Simulations Standard toolbox: Version=7
  Folder Structural
    Folder
    Zone: Area=1; Slope=0
      SoluteManager
    Replacements
  Folder Standard models
    Weather: FileName=Goondiwindi.met
    Clock: StartDate=1940-01-01; EndDate=1989-12-31
    Summary
    Report: EventNames=[Clock].EndOfDay
      VariableNames:
        [Clock].Today
        [Weather].MaxT
        [Weather].MinT
        [Weather].Radn
        [Weather].Rain
    Fertiliser
    Irrigation
    Operations
    Soil: SoilType=Black Vertosol; LocalName=Waco; Site=Jimbour; NearestTown=Jimbour, Q 4352; Region=South East Queensland; NaturalVegetation=Grassland, mainly Qld bluegrass; Latitude=0; Longitude=0
      Water
        Thickness  BD    AirDry  LL15  DUL   SAT
        150        1.02  0.15    0.29  0.54  0.59
        150        1.03  0.26    0.29  0.53  0.58
        300        1.02  0.29    0.29  0.54  0.59
        300        1.02  0.29    0.29  0.54  0.58
        300        1.06  0.3     0.3   0.52  0.57
        300        1.11  0.31    0.31  0.5   0.55
        300        1.12  0.32    0.32  0.5   0.55
        300        1.15  0.33    0.33  0.48  0.53
        300        1.18  0.34    0.34  0.47  0.52
        300        1.2   0.35    0.35  0.46  0.51
        300        1.25  0.36    0.36  0.44  0.49
        SoilCrop WheatSoil
          LL=[0.29, 0.29, 0.32, 0.38, 0.39, 0.39, 0.41, 0.48, 0.47, 0.46, 0.44]
          KL=[0.1, 0.1, 0.08, 0.06, 0.04, 0.02, 0.01, 0, 0, 0, 0]
          XF=[1, 1, 1, 1, 1, 1, 1, 0, 0, 0, 0]
        SoilCropOilPalm OilPalm: XF=[1, 1, 1, 1, 1, 1, 1, 1, 1, 0, 0, 0]
          KL=[0.06, 0.04, 0.03, 0.02, 0.02, 0.02, 0.01, 0.01, 0.01, 0, 0, 0]
      SoilWater: SummerDate=1-Nov; SummerU=6; SummerCona=3.5; WinterDate=1-Apr; WinterU=6; WinterCona=3.5; DiffusConst=40; DiffusSlope=16; Salb=0.13; CN2Bare=73; CNRed=20; CNCov=0.8; max_pond=0; Thickness=[150, 150, 300, 300, 300, 300, 300, 300, 300, 300, 300]; SWCON=[0.3, 0.3, 0.3, 0.3, 0.3, 0.3, 0.3, 0.3, 0.3, 0.3, 0.3]; residueinterception=0
      SoilNitrogen: fom_type=[default, manure, mucuna, lablab, shemp, stable]; fract_carb=[0.2, 0.3, 0.54, 0.57, 0.45, 0]; fract_cell=[0.7, 0.3, 0.37, 0.37, 0.47, 0.1]; fract_lign=[0.1, 0.4, 0.09, 0.06, 0.08, 0.9]; wfpsN2N2O_x=[22, 88]; wfpsN2N2O_y=[0.1, 1]
      SoilOrganicMatter: RootCN=40; RootWt=200; SoilCN=12.5; EnrACoeff=7.4; EnrBCoeff=0.2; OCUnits=Total
        Thickness  OC    FBiom  FInert
        150        1.04  0.025  0.4
        150        0.89  0.02   0.6
        300        0.89  0.015  0.8
        300        0.89  0.01   0.9
        300        0.77  0.01   0.95
        300        0.45  0.01   0.95
        300        0.27  0.01   0.95
        300        0.22  0.01   0.95
        300        0.16  0.01   0.95
        300        0.13  0.01   0.95
        300        0.12  0.01   0.95
      Analysis: PHUnits=Water; BoronUnits=HotWater
        Thickness  EC    PH
        150        0.2   8.4
        150        0.25  8.8
        300        0.31  9
        300        0.4   9.2
        300        0.59  9.2
        300        0.84  9.1
        300        0.93  9
        300        1.01  9
        300        1.06  8.9
        300        1.05  8.9
        300        1.01  8.9
      InitialWater Initial water: PercentMethod=FilledFromTop; FractionFull=1
      Sample: NO3Units=ppm; NH4Units=ppm; SWUnits=Volumetric; OCUnits=Total; PHUnits=Water
        Thickness  NO3    NH4
        150        6.503  0.599004
        150        2.101  0.100001
        300        2.101  0.100001
        300        1.701  0.100001
        300        1.701  0.100001
        300        1.701  0.100001
        300        1.701  0.100001
        300        1.701  0.100001
        300        1.701  0.100001
        300        1.701  0.100001
        300        1.701  0.100001
      CERESSoilTemperature
    SurfaceOrganicMatter: PoolName=wheat; type=wheat; mass=1000; standing_fraction=0; cnr=80; CriticalResidueWeight=2000; OptimumDecompTemp=20; MaxCumulativeEOS=20; CNRatioDecompCoeff=0.277; CNRatioDecompThreshold=25; TotalLeachRain=25; MinRainToLeach=10; CriticalMinimumOrganicC=0.004; DefaultCPRatio=0; DefaultStandingFraction=0; StandingExtinctCoeff=0.5; FractionFaecesAdded=0.5
      Pools:
        {PoolName=wheat, ResidueType=wheat, Mass=1000, CNRatio=80, StandingFraction=0}
      ResidueTypes ResidueTypesList: LoadFromResource=ResidueTypes
        ResidueType wheat: fom_type=inert; fraction_C=0.08; po4ppm=10; nh4ppm=10; no3ppm=10; specific_area=0.0001; cf_contrib=1; pot_decomp_rate=0.1; fr_c=[0.3, 0.3, 0.4]; fr_n=[0.3, 0.3, 0.4]; fr_p=[0.3, 0.3, 0.4]
      TillageTypes TillageTypesList
    MicroClimate: a_interception=0; b_interception=1; c_interception=0; d_interception=0; soil_albedo=0.23; sun_angle=15; soil_heat_flux_fraction=0.4; night_interception_fraction=0.5; refheight=2; albedo=0.15; emissivity=0.96; RadIntTotal=0
  Folder Crops
    Plant Barley: CropType=Barley
    Plant Wheat: CropType=Wheat
    Plant Eucalyptus: CropType=Eucalyptus
    OilPalm
      zero: interception, UnderstoryCoverMax, UnderstoryLegumeFraction, InterceptionFraction, MaximumRootDepth, RootDepth, DltDM, ReproductiveGrowthFraction, UnderstoryCoverGreen
    Plant Maize: CropType=Maize
    Plant Slurp: CropType=Slurp
    Plant SCRUM: CropType=SCRUM
    Plant Chicory: CropType=Chicory
    Plant FodderBeet: CropType=FodderBeet
    Plant PlantainForage: CropType=PlantainForage
    Plant WhiteClover: CropType=WhiteClover
    Plant Potato: CropType=Chicory
    CultivarFolder
    Folder Wheat cultivars
      Folder Yield Prophet cultivars
        Cultivar Early
          Command:
            [Phenology].Vernalisation.VernSens = 2.3
            [Phenology].Vernalisation.PhotopSens = 3.2
          Alias Scythe
          Alias arrino
          Alias bonnie_rock
          Alias bowerbird
          Alias crusader
          Alias dart
          Alias drysdale
          Alias emurock
          Alias hunter
          Alias hybrid_mercury
          Alias hyperno
          Alias imposeclplus
          Alias kalka
          Alias Krichauff
          Alias kukri
          Alias livingston
          Alias mace
          Alias ouyen
          Alias perengori
          Alias ruby
          Alias tamaroi
          Alias wyalkatchem
          Alias young
        Cultivar EarlyMid
          Command:
            [Phenology].Vernalisation.VernSens = 1.5
            [Phenology].Vernalisation.PhotopSens = 3.0
          Alias annuello
          Alias barunga
          Alias carnamah
          Alias catalina
          Alias clf_stiletto
          Alias cobra
          Alias corack
          Alias correll
          Alias diamondbird
          Alias estoc
          Alias frame
          Alias gladius
          Alias goroke
          Alias grenadeclplus
          Alias guardian
          Alias Halberd
          Alias hartog
          Alias impala
          Alias justica
          Alias kord
          Alias merlin
          Alias mitre
          Alias pugsley
          Alias shield
          Alias spitfire
          Alias stiletto
          Alias sunguard
          Alias sunstate
          Alias ventura
          Alias yallaroi
          Alias yawa
          Alias yitpi
        Cultivar VeryEarly
          Command:
            [Phenology].Vernalisation.VernSens = 1.5
            [Phenology].Vernalisation.PhotopSens = 1.5
          Alias h45
          Alias h46
          Alias saintly
          Alias silverstar
          Alias tamarinrock
          Alias waagan
          Alias westonia
          Alias wollaroi
          Alias zippy
        Cultivar Mid
          Command:
            [Phenology].Vernalisation.VernSens = 1.5
            [Phenology].Vernalisation.PhotopSens = 3.5
          Alias arrivato
          Alias babbler
          Alias barham
          Alias baxter
          Alias buckley
          Alias camm
          Alias carinya
          Alias clf-jnz
          Alias derrimut
          Alias dollarbird
          Alias elmoreclplus
          Alias justicaclplus
          Alias saphire
          Alias wallup
        Cultivar MidPlus
          Command:
            [Phenology].Vernalisation.VernSens = 2.0
            [Phenology].Vernalisation.PhotopSens = 3.5
          Alias bellaroi
          Alias lang
          Alias caparoi
          Alias suntop
        Cultivar MidLate
          Command:
            [Phenology].Vernalisation.VernSens = 2.8
            [Phenology].Vernalisation.PhotopSens = 3.0
          Alias braewood
          Alias calingiri
          Alias chara
          Alias endure
          Alias envoy
          Alias gauntlet
          Alias gazelle
          Alias giles
          Alias magenta
          Alias phantom
          Alias sentinel
          Alias sunlin
          Alias sunvale
          Alias wylie
        Cultivar Late
          Command:
            [Phenology].Vernalisation.VernSens = 2.5
            [Phenology].Vernalisation.PhotopSens = 4.0
          Alias beaufont
          Alias bolac
          Alias forrest
          Alias kelallac
          Alias preston
          Alias strzelecki
        Cultivar WinterWheat
          Command:
            [Phenology].Vernalisation.VernSens = 3.9
            [Phenology].Vernalisation.PhotopSens = 3.9
            [Phenology].FloralInitiationToFlowering.Target.FixedValue = 380
          Alias lorikeet
          Alias wylah
          Alias rosella
          Alias whistler
          Alias wedgetail
        Cultivar Axe
          Command:
            [Phenology].Vernalisation.VernSens = 2.0
            [Phenology].Vernalisation.PhotopSens = 3.0
          Alias axe
        Cultivar Scout
          Command:
            [Phenology].Vernalisation.VernSens = 1.8
            [Phenology].Vernalisation.PhotopSens = 3.5
            [Phenology].StartGrainFillToEndGrainFill.Target.FixedValue = 550
          Alias scout
          Alias l
        Cultivar Lincoln
          Command:
            [Phenology].Vernalisation.VernSens = 1.8
            [Phenology].Vernalisation.PhotopSens = 3.5
          Alias lincoln
        Cultivar GregoryLancer
          Command:
            [Phenology].Vernalisation.VernSens = 2.7
            [Phenology].Vernalisation.PhotopSens = 3.2
          Alias gregory
          Alias lancer
        Cultivar Eaglehawk
          Command:
            [Phenology].Vernalisation.VernSens = 2.5
            [Phenology].Vernalisation.PhotopSens = 2.5
            [Phenology].EndOfJuvenileToFloralInitiation.Target.FixedValue = 500
            [Phenology].FloralInitiationToFlowering.Target.FixedValue = 655
            [Phenology].FloweringToStartGrainFill.Target.FixedValue = 250
            [Phenology].StartGrainFillToEndGrainFill.Target.FixedValue = 500
          Alias eaglehawk
        Cultivar Marombi
          Command:
            [Phenology].Vernalisation.VernSens = 3.9
            [Phenology].Vernalisation.PhotopSens = 4.0
            [Phenology].FloralInitiationToFlowering.Target.FixedValue = 455
    Folder OilPalm cultivars
      Cultivar Dami
        Command:
          [FrondMaxArea].XYPairs.X = 0,2,4.5,8.5,14
          [FrondMaxArea].XYPairs.Y = 0.1,1,7,12,14
      Cultivar SuperFamily
        Command:
          [FrondMaxArea].XYPairs.X = 0,2,4.5,8.5,14
          [FrondMaxArea].XYPairs.Y = 0.1,0.9,0.63,10.8,12.6
  Folder Animals
    Stock: RandSeed=0
      PaddockList:
        {area=1, slope=0}
    Supplement: SpoilageTime=0
      stores:
        {IsRoughage=true, DMContent=0.85, DMD=0, MEContent=0, CPConc=0, ProtDg=0, PConc=0, SConc=0, EEConc=0, ADIP2CP=0, AshAlk=0, MaxPassage=0, Name=fodder, Stored=0}
  Folder Data store and analysis models
    DataStore
    Input
    ExcelInput
      FileName source: Excel files (*.xlsx)|*.xlsx, All files (*.*)|*.*
    PredictedObserved
    TimeSeriesStats: TableName=PredictedObserved
    Probability: Exceedence=true
  Tests
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