Simulations Training: Version=188
  Folder Soils
    Soil Heavy Clay: ASCOrder=Vertosol; ASCSubOrder=Black; SoilType=Clay; Site=Kaimkillenbun; NearestTown=Kaimkillenbun, Q 4406; Region=Darling Downs and Granite Belt; State=Queensland; Country=Australia; NaturalVegetation=Open woodland with mountain coolibah; ApsoilNumber=11; Latitude=-27.066; Longitude=151.413; LocationAccuracy=+/- 20m; DataSource=CSIRO Sustainable Ecosystems, Toowoomba; Comments=oc and ph estimated
      Physical
        Thickness  BD    AirDry  LL15  DUL   SAT
        150        1.01  0.11    0.22  0.54  0.59
        150        1.04  0.176   0.22  0.53  0.58
        300        1.07  0.28    0.28  0.52  0.57
        300        1.08  0.28    0.28  0.51  0.56
        300        1.15  0.28    0.28  0.49  0.54
        300        1.23  0.28    0.28  0.46  0.51
        300        1.26  0.28    0.28  0.44  0.49
        SoilCrop WheatSoil: LL=[0.22, 0.22, 0.28, 0.28, 0.34, 0.37, 0.36]; KL=[0.06, 0.06, 0.06, 0.04, 0.04, 0.02, 0.02]; XF=[1, 1, 1, 1, 1, 1, 1]
        SoilCrop BarleySoil: LL=[0.22, 0.22, 0.31, 0.31, 0.36, 0.37, 0.36]; KL=[0.07, 0.07, 0.07, 0.05, 0.05, 0.04, 0.03]; XF=[1, 1, 1, 1, 1, 1, 1]
      WaterBalance SoilWater: SummerDate=1-Nov; SummerU=6; SummerCona=3.5; WinterDate=1-Apr; WinterU=4; WinterCona=2.5; DiffusConst=40; DiffusSlope=16; Salb=0.12; CN2Bare=73; CNRed=20; CNCov=0.8; PSIDul=-100; Thickness=[150, 150, 300, 300, 300, 300, 300]; SWCON=[0.3, 0.3, 0.3, 0.3, 0.3, 0.3, 0.3]
      Water: Thickness=[150, 150, 300, 300, 300, 300, 300]; InitialValues=[0.54, 0.53, 0.52, 0.51, 0.49, 0.46, 0.44]; InitialPAWmm=400.5; RelativeTo=LL15; FilledFromTop=false
      Organic: FOMCNRatio=40; CarbonUnits=Total
        Thickness  Carbon  SoilCNRatio  FBiom  FInert  FOM
        150        0.954   12           0.04   0.4     347.129
        150        0.954   12           0.02   0.6     270.344
        300        0.962   12           0.02   0.8     163.972
        300        0.846   12           0.02   1       99.454
        300        0.546   12           0.01   1       60.322
        300        0.262   12           0.01   1       36.587
        300        0.2     12           0.01   1       22.191
      Chemical: Thickness=[150, 150, 300, 300, 300, 300, 300]; PH=[8, 8, 8, 8, 8, 8, 8]; PHUnits=Water
      CERESSoilTemperature Temperature
      Nutrient
      Solute NO3: Thickness=[2000]; InitialValues=[50]; InitialValuesUnits=ppm; WaterTableConcentration=0; D0=0; DepthConstant=0; MaxDepthSoluteAccessible=0; RunoffEffectivenessAtMovingSolute=0; MaxEffectiveRunoff=0
      Solute NH4: Thickness=[2000]; InitialValues=[4]; InitialValuesUnits=ppm; WaterTableConcentration=0; D0=0; DepthConstant=0; MaxDepthSoluteAccessible=0; RunoffEffectivenessAtMovingSolute=0; MaxEffectiveRunoff=0
      Solute Urea: Thickness=[2000]; InitialValues=[0]; InitialValuesUnits=ppm; WaterTableConcentration=0; D0=0; DepthConstant=0; MaxDepthSoluteAccessible=0; RunoffEffectivenessAtMovingSolute=0; MaxEffectiveRunoff=0
    Soil Sand: SoilType=Deep sandy duplex; Site=Cunderdin; NearestTown=Cunderdin; Region=Central Region_Avon; State=Western Australia; Country=Australia; ApsoilNumber=486; Latitude=-31.457; Longitude=117.244; LocationAccuracy=+/- 20m; DataSource=DAFWA_A. Stuart-Street _ NEAR project Yield Prophet
      Comments=YP11 - reticulite subsoil (coarse with sand seams)-estimated LL.  12/05/2010 Zvi Hochman modified values for kl(wheat), salb, DiffusConst, DiffusSlope, CN2Bare at request of DAFWA
      Physical
        Thickness  BD    AirDry  LL15   DUL    SAT
        100        1.64  0.015   0.03   0.09   0.354
        200        1.78  0.035   0.041  0.1    0.305
        200        1.92  0.14    0.14   0.187  0.262
        300        1.84  0.14    0.14   0.197  0.29
        400        2     0.14    0.14   0.169  0.233
        100        1.95  0.14    0.14   0.196  0.251
        SoilCrop WheatSoil: LL=[0.03, 0.041, 0.14, 0.14, 0.14, 0.142]; KL=[0.06, 0.06, 0.06, 0.04, 0.04, 0.02]; XF=[1, 1, 1, 1, 1, 1]
      WaterBalance SoilWater: SummerDate=1-Nov; SummerU=6; SummerCona=3.5; WinterDate=1-Apr; WinterU=2; WinterCona=2; DiffusConst=40; DiffusSlope=16; Salb=0.14; CN2Bare=60; CNRed=20; CNCov=0.8; PSIDul=-100; Thickness=[100, 200, 200, 300, 400, 100]; SWCON=[0.7, 0.7, 0.5, 0.5, 0.5, 0.5]
      Water: Thickness=[100, 200, 200, 300, 400, 100]; InitialValues=[0.09, 0.1, 0.187, 0.197, 0.169, 0.196]; InitialPAWmm=61.5; RelativeTo=LL15; FilledFromTop=false
      Organic: FOMCNRatio=40; CarbonUnits=Total
        Thickness  Carbon  SoilCNRatio  FBiom  FInert  FOM
        100        0.059   12           0.035  0.4     422.276
        200        0.173   12           0.02   0.5     266.166
        200        0.103   12           0.015  0.7     167.768
        300        0.041   12           0.015  0.95    83.954
        400        0.028   12           0.01   0.95    33.355
        100        0.065   12           0.01   0.95    26.481
      Chemical: Thickness=[100, 200, 200, 300, 400, 100]; PH=[6.4, 5.8, 6, 6.2, 6.2, 5.9]; PHUnits=Water
      CERESSoilTemperature Temperature
      Nutrient
      Solute NO3: Thickness=[2000]; InitialValues=[50]; InitialValuesUnits=ppm; WaterTableConcentration=0; D0=0; DepthConstant=0; MaxDepthSoluteAccessible=0; RunoffEffectivenessAtMovingSolute=0; MaxEffectiveRunoff=0
      Solute NH4: Thickness=[2000]; InitialValues=[4]; InitialValuesUnits=ppm; WaterTableConcentration=0; D0=0; DepthConstant=0; MaxDepthSoluteAccessible=0; RunoffEffectivenessAtMovingSolute=0; MaxEffectiveRunoff=0
      Solute Urea: Thickness=[2000]; InitialValues=[0]; InitialValuesUnits=ppm; WaterTableConcentration=0; D0=0; DepthConstant=0; MaxDepthSoluteAccessible=0; RunoffEffectivenessAtMovingSolute=0; MaxEffectiveRunoff=0
  Folder Completed Simulations
    Folder Exercise 1
      Simulation Clay Fallow
        Clock: Start=1989-01-01; End=1989-12-31
        Summary SummaryFile
        Weather: FileName=%root%/Examples/WeatherFiles/AU_Dalby.met; Latitude=-27.18; Tav=19.09; Amp=14.63
        Zone Field: Area=1; Slope=0; AspectAngle=0; Altitude=50
          Report: EventNames=[Clock].EndOfDay
            VariableNames:
              [Clock].Today
              [Weather].Rain
              sum([Soil].SoilWater.ESW)
              [Soil].SoilWater.Es
              [Soil].SoilWater.Runoff
              [Soil].SoilWater.Drainage
              sum([Soil].NO3.kgha)
              sum([Soil].Nutrient.MineralisedN
              [SurfaceOrganicMatter].Wt
              [SurfaceOrganicMatter].Cover
          SurfaceOrganicMatter: InitialResidueName=wheat_stubble; InitialResidueType=wheat; InitialResidueMass=1000; InitialStandingFraction=0; InitialCPR=0; InitialCNR=100
          MicroClimate: a_interception=0; b_interception=1; c_interception=0; d_interception=0; SoilHeatFluxFraction=0.4; MinimumHeightDiffForNewLayer=0; NightInterceptionFraction=0.5; ReferenceHeight=2
          Soil Heavy Clay: ASCOrder=Vertosol; ASCSubOrder=Black; SoilType=Clay; Site=Kaimkillenbun; NearestTown=Kaimkillenbun, Q 4406; Region=Darling Downs and Granite Belt; State=Queensland; Country=Australia; NaturalVegetation=Open woodland with mountain coolibah; ApsoilNumber=11; Latitude=-27.066; Longitude=151.413; LocationAccuracy=+/- 20m; DataSource=CSIRO Sustainable Ecosystems, Toowoomba; Comments=oc and ph estimated
            Physical: same as Soils.Heavy Clay.Physical
            WaterBalance SoilWater: same as Soils.Heavy Clay.SoilWater
            Water: Thickness=[150, 150, 300, 300, 300, 300, 300]; InitialValues=[0.487, 0.22, 0.28, 0.28, 0.28, 0.28, 0.28]; InitialPAWmm=40.05; RelativeTo=LL15; FilledFromTop=true
            Organic: FOMCNRatio=40; CarbonUnits=Total
              Thickness  Carbon    SoilCNRatio  FBiom  FInert  FOM
              150        0.953846  12           0.04   0.4     347.129
              150        0.953846  12           0.02   0.6     270.344
              300        0.961538  12           0.02   0.8     163.972
              300        0.846154  12           0.02   1       99.4541
              300        0.546154  12           0.01   1       60.322
              300        0.261538  12           0.01   1       36.5871
              300        0.2       12           0.01   1       22.1912
            Chemical: Thickness=[150, 150, 300, 300, 300, 300, 300]; PH=[8, 8, 8, 8, 8, 8, 8]; PHUnits=Water
            CERESSoilTemperature Temperature
            Nutrient
            Solute NO3: Thickness=[2000]; InitialValues=[50]; InitialValuesUnits=ppm; WaterTableConcentration=0; D0=0; DepthConstant=0; MaxDepthSoluteAccessible=0; RunoffEffectivenessAtMovingSolute=0; MaxEffectiveRunoff=0
            Solute NH4: Thickness=[2000]; InitialValues=[4]; InitialValuesUnits=ppm; WaterTableConcentration=0; D0=0; DepthConstant=0; MaxDepthSoluteAccessible=0; RunoffEffectivenessAtMovingSolute=0; MaxEffectiveRunoff=0
            Solute Urea: Thickness=[2000]; InitialValues=[0]; InitialValuesUnits=ppm; WaterTableConcentration=0; D0=0; DepthConstant=0; MaxDepthSoluteAccessible=0; RunoffEffectivenessAtMovingSolute=0; MaxEffectiveRunoff=0
      Simulation Sand Fallow
        Clock: Start=1989-01-01; End=1989-12-31
        Summary SummaryFile
        Weather: FileName=%root%/Examples/WeatherFiles/AU_Dalby.met; Latitude=-27.18; Tav=19.09; Amp=14.63
        Zone Field: Area=1; Slope=0; AspectAngle=0; Altitude=50
          Report: same as Completed Simulations.Exercise 1.Clay Fallow.Field.Report
          SurfaceOrganicMatter: InitialResidueName=wheat_stubble; InitialResidueType=wheat; InitialResidueMass=1000; InitialStandingFraction=0; InitialCPR=0; InitialCNR=100
          MicroClimate: a_interception=0; b_interception=1; c_interception=0; d_interception=0; SoilHeatFluxFraction=0.4; MinimumHeightDiffForNewLayer=0; NightInterceptionFraction=0.5; ReferenceHeight=2
          Soil Sand: SoilType=Deep sandy duplex; Site=Cunderdin; NearestTown=Cunderdin; Region=Central Region_Avon; State=Western Australia; Country=Australia; ApsoilNumber=486; Latitude=-31.457; Longitude=117.244; LocationAccuracy=+/- 20m; DataSource=DAFWA_A. Stuart-Street _ NEAR project Yield Prophet
            Comments=YP11 - reticulite subsoil (coarse with sand seams)-estimated LL.  12/05/2010 Zvi Hochman modified values for kl(wheat), salb, DiffusConst, DiffusSlope, CN2Bare at request of DAFWA
            Physical: same as Soils.Sand.Physical
            WaterBalance SoilWater: same as Soils.Sand.SoilWater
            Water: Thickness=[100, 200, 200, 300, 400, 100]; InitialValues=[0.09, 0.042, 0.14, 0.14, 0.14, 0.14]; InitialPAWmm=6.2; RelativeTo=LL15; FilledFromTop=true
            Organic: FOMCNRatio=40; CarbonUnits=Total
              Thickness  Carbon  SoilCNRatio  FBiom  FInert  FOM
              100        0.0593  12           0.035  0.4     422.276
              200        0.1731  12           0.02   0.5     266.166
              200        0.103   12           0.015  0.7     167.768
              300        0.0409  12           0.015  0.95    83.9544
              400        0.0275  12           0.01   0.95    33.3547
              100        0.0648  12           0.01   0.95    26.481
            Chemical: Thickness=[100, 200, 200, 300, 400, 100]; PH=[6.4, 5.8, 6, 6.2, 6.2, 5.9]; PHUnits=Water
            CERESSoilTemperature Temperature
            Nutrient
            Solute NO3: Thickness=[2000]; InitialValues=[50]; InitialValuesUnits=ppm; WaterTableConcentration=0; D0=0; DepthConstant=0; MaxDepthSoluteAccessible=0; RunoffEffectivenessAtMovingSolute=0; MaxEffectiveRunoff=0
            Solute NH4: Thickness=[2000]; InitialValues=[4]; InitialValuesUnits=ppm; WaterTableConcentration=0; D0=0; DepthConstant=0; MaxDepthSoluteAccessible=0; RunoffEffectivenessAtMovingSolute=0; MaxEffectiveRunoff=0
            Solute Urea: Thickness=[2000]; InitialValues=[0]; InitialValuesUnits=ppm; WaterTableConcentration=0; D0=0; DepthConstant=0; MaxDepthSoluteAccessible=0; RunoffEffectivenessAtMovingSolute=0; MaxEffectiveRunoff=0
      DataStore
    Folder Exercise 2
      Simulation Clay Fallow 2
        Clock: Start=1989-01-01; End=1989-12-31
        Summary SummaryFile
        Weather: FileName=%root%/Examples/WeatherFiles/AU_Dalby.met; Latitude=-27.18; Tav=19.09; Amp=14.63
        Zone Field: Area=1; Slope=0; AspectAngle=0; Altitude=50
          Report: same as Completed Simulations.Exercise 1.Clay Fallow.Field.Report
          Fertiliser
          SurfaceOrganicMatter: InitialResidueName=wheat_stubble; InitialResidueType=wheat; InitialResidueMass=1000; InitialStandingFraction=0; InitialCPR=0; InitialCNR=100
          MicroClimate: a_interception=0; b_interception=1; c_interception=0; d_interception=0; SoilHeatFluxFraction=0.4; MinimumHeightDiffForNewLayer=0; NightInterceptionFraction=0.5; ReferenceHeight=2
          Soil Heavy Clay: same as Completed Simulations.Exercise 1.Clay Fallow.Field.Heavy Clay
      DataStore
      Simulation Clay Residue
        Clock: Start=1989-01-01; End=1989-12-31
        Summary SummaryFile
        Weather: FileName=%root%/Examples/WeatherFiles/AU_Dalby.met; Latitude=-27.18; Tav=19.09; Amp=14.63
        Zone Field: Area=1; Slope=0; AspectAngle=0; Altitude=50
          Report: same as Completed Simulations.Exercise 1.Clay Fallow.Field.Report
          Fertiliser
          SurfaceOrganicMatter: InitialResidueName=wheat_stubble; InitialResidueType=wheat; InitialResidueMass=3000; InitialStandingFraction=0; InitialCPR=0; InitialCNR=100
          MicroClimate: a_interception=0; b_interception=1; c_interception=0; d_interception=0; SoilHeatFluxFraction=0.4; MinimumHeightDiffForNewLayer=0; NightInterceptionFraction=0.5; ReferenceHeight=2
          Soil Heavy Clay: same as Completed Simulations.Exercise 1.Clay Fallow.Field.Heavy Clay
    Folder Exercise 3
      Simulation Nitrogen Cycle
        Clock: Start=1989-01-01; End=1989-12-31
        Summary SummaryFile
        Weather: FileName=%root%/Examples/WeatherFiles/AU_Dalby.met; Latitude=-27.18; Tav=19.09; Amp=14.63
        Zone Field: Area=1; Slope=0; AspectAngle=0; Altitude=50
          Report: EventNames=[Clock].EndOfDay
            VariableNames:
              [Clock].Today
              [Weather].Rain
              [Soil].SoilWater.Drainage
              sum([Soil].SoilWater.ESW)
              sum([Soil].NO3.kgha) as NO3Total
              sum([Soil].NH4.kgha) as NH4Total
              sum([Soil].Nutrient.DenitrifiedN) as Denitrification
          Fertiliser
          SurfaceOrganicMatter: InitialResidueName=wheat_stubble; InitialResidueType=wheat; InitialResidueMass=1000; InitialStandingFraction=0; InitialCPR=0; InitialCNR=100
          MicroClimate: a_interception=0; b_interception=1; c_interception=0; d_interception=0; SoilHeatFluxFraction=0.4; MinimumHeightDiffForNewLayer=0; NightInterceptionFraction=0.5; ReferenceHeight=2
          Soil Heavy Clay: ASCOrder=Vertosol; ASCSubOrder=Black; SoilType=Clay; Site=Kaimkillenbun; NearestTown=Kaimkillenbun, Q 4406; Region=Darling Downs and Granite Belt; State=Queensland; Country=Australia; NaturalVegetation=Open woodland with mountain coolibah; ApsoilNumber=11; Latitude=-27.066; Longitude=151.413; LocationAccuracy=+/- 20m; DataSource=CSIRO Sustainable Ecosystems, Toowoomba; Comments=oc and ph estimated
            Physical: same as Soils.Heavy Clay.Physical
            WaterBalance SoilWater: same as Soils.Heavy Clay.SoilWater
            Water: Thickness=[150, 150, 300, 300, 300, 300, 300]; InitialValues=[0.38, 0.375, 0.4, 0.395, 0.385, 0.37, 0.36]; InitialPAWmm=200.25; RelativeTo=LL15; FilledFromTop=false
            Organic: same as Completed Simulations.Exercise 1.Clay Fallow.Field.Heavy Clay.Organic
            Chemical: Thickness=[150, 150, 300, 300, 300, 300, 300]; PH=[8, 8, 8, 8, 8, 8, 8]; PHUnits=Water
            CERESSoilTemperature Temperature
            Nutrient
            Solute NO3: Thickness=[2000]; InitialValues=[50]; InitialValuesUnits=ppm; WaterTableConcentration=0; D0=0; DepthConstant=0; MaxDepthSoluteAccessible=0; RunoffEffectivenessAtMovingSolute=0; MaxEffectiveRunoff=0
            Solute NH4: Thickness=[2000]; InitialValues=[4]; InitialValuesUnits=ppm; WaterTableConcentration=0; D0=0; DepthConstant=0; MaxDepthSoluteAccessible=0; RunoffEffectivenessAtMovingSolute=0; MaxEffectiveRunoff=0
            Solute Urea: Thickness=[2000]; InitialValues=[0]; InitialValuesUnits=ppm; WaterTableConcentration=0; D0=0; DepthConstant=0; MaxDepthSoluteAccessible=0; RunoffEffectivenessAtMovingSolute=0; MaxEffectiveRunoff=0
      DataStore
    Folder Exercise 4
      Simulation 0N
        Clock: Start=1900-01-01; End=2000-12-31
        Summary SummaryFile
        Weather: FileName=%root%/Examples/WeatherFiles/AU_Dalby.met; Latitude=-27.18; Tav=19.09; Amp=14.63
        Zone Field: Area=1; Slope=0; AspectAngle=0; Altitude=50
          Report: EventNames=[Wheat].Harvesting
            VariableNames:
              [Clock].Today
              [Wheat].Zadok.Stage
              [Wheat].Phenology.CurrentStageName
              [Wheat].AboveGround.Wt
              [Wheat].AboveGround.N
              [Wheat].Grain.Yield
              [Wheat].Grain.Protein
              [Wheat].Grain.Size
              [Wheat].Grain.GrainNo
              [Wheat].Grain.Wt
              [Wheat].Grain.N
              [Wheat].Total.Wt
              sum([Soil].Nutrient.TotalC)/1000 as SoilCtpha
          Fertiliser
          Soil: ASCOrder=Vertosol; ASCSubOrder=Black; SoilType=Clay; Site=Norwin; NearestTown=Norwin; Region=Darling Downs and Granite Belt; State=Queensland; Country=Australia; NaturalVegetation=Qld. Bluegrass, possible Qld. Blue gum; ApsoilNumber=900; Latitude=-27.581836; Longitude=151.320206; LocationAccuracy=+/- 20m
            DataSource=CSIRO Sustainable Ecosystems, Toowoomba; Characteriesd as part of the GRDC funded project"Doing it better, doing it smarter, managing soil water in Australian agriculture' 2011
            Comments=OC, CLL for all crops estimated-based on Bongeen Mywybilla Soil No1
            Physical
              Thickness  BD       AirDry    LL15      DUL       SAT       KS
              150        1.01056  0.13025   0.2605    0.521     0.588655  20
              150        1.07146  0.198689  0.248362  0.496723  0.565677  20
              300        1.09394  0.28      0.28      0.488438  0.557193  20
              300        1.15861  0.28      0.28      0.480297  0.532787  20
              300        1.17301  0.28      0.28      0.471584  0.527354  20
              300        1.16287  0.28      0.28      0.457071  0.53118   20
              300        1.1875   0.28      0.28      0.452332  0.521888  20
              SoilCrop WheatSoil: LL=[0.261, 0.248, 0.28, 0.306, 0.36, 0.392, 0.446]; KL=[0.06, 0.06, 0.06, 0.04, 0.04, 0.02, 0.01]; XF=[1, 1, 1, 1, 1, 1, 1]
            WaterBalance SoilWater: SummerDate=1-Nov; SummerU=5; SummerCona=5; WinterDate=1-Apr; WinterU=5; WinterCona=5; DiffusConst=40; DiffusSlope=16; Salb=0.12; CN2Bare=73; CNRed=20; CNCov=0.8; PSIDul=-100; Thickness=[150, 150, 300, 300, 300, 300, 300]; SWCON=[0.3, 0.3, 0.3, 0.3, 0.3, 0.3, 0.3]
            Organic: FOMCNRatio=40; CarbonUnits=Total
              Thickness  Carbon  SoilCNRatio  FBiom  FInert  FOM
              150        1.2     12           0.04   0.4     347.129
              150        0.96    12           0.02   0.6     270.344
              300        0.6     12           0.02   0.8     163.972
              300        0.3     12           0.02   1       99.454
              300        0.18    12           0.01   1       60.322
              300        0.12    12           0.01   1       36.587
              300        0.12    12           0.01   1       22.191
            Chemical: Thickness=[150, 150, 300, 300, 300, 300, 300]; PH=[8, 8, 8, 8, 8, 8, 8]; PHUnits=Water
            Water: Thickness=[150, 150, 300, 300, 300, 300, 300]; InitialPAWmm=361.245; RelativeTo=LL15; FilledFromTop=false
              InitialValues=[0.521, 0.496723, 0.488438, 0.480297, 0.471584, 0.457071, 0.452332]
            CERESSoilTemperature Temperature
            Nutrient
            Solute NO3: Thickness=[2000]; InitialValues=[50]; InitialValuesUnits=ppm; WaterTableConcentration=0; D0=0; DepthConstant=0; MaxDepthSoluteAccessible=0; RunoffEffectivenessAtMovingSolute=0; MaxEffectiveRunoff=0
            Solute NH4: Thickness=[2000]; InitialValues=[4]; InitialValuesUnits=ppm; WaterTableConcentration=0; D0=0; DepthConstant=0; MaxDepthSoluteAccessible=0; RunoffEffectivenessAtMovingSolute=0; MaxEffectiveRunoff=0
            Solute Urea: Thickness=[2000]; InitialValues=[0]; InitialValuesUnits=ppm; WaterTableConcentration=0; D0=0; DepthConstant=0; MaxDepthSoluteAccessible=0; RunoffEffectivenessAtMovingSolute=0; MaxEffectiveRunoff=0
          SurfaceOrganicMatter: InitialResidueName=wheat_stubble; InitialResidueType=wheat; InitialResidueMass=500; InitialStandingFraction=0; InitialCPR=0; InitialCNR=100
          Plant Wheat
          MicroClimate: a_interception=0; b_interception=1; c_interception=0; d_interception=0; SoilHeatFluxFraction=0.4; MinimumHeightDiffForNewLayer=0; NightInterceptionFraction=0.5; ReferenceHeight=2
          Manager SowingFertiliser
            Amount = 0
            CropName = wheat
```csharp
using Models.Soils;
using System;
using Models.Core;
using Models.PMF;
namespace Models
{
    [Serializable]
    public class Script : Model
    {
        [Link] Clock Clock;
        [Link] Fertiliser Fertiliser;
        [Link] Summary Summary;
        
        
        [Description("Amount of fertiliser to be applied (kg/ha)")]
        public double Amount { get; set;}
        
        [Description("Crop to be fertilised")]
        public string CropName { get; set;}
        
        
        

        [EventSubscribe("Sowing")]
        private void OnSowing(object sender, EventArgs e)
        {
            Model crop = sender as Model;
            if (crop.Name.ToLower()==CropName.ToLower())
                Fertiliser.Apply(amount: Amount, type: "NO3N");
        }
        
    }
}
```
          Manager SowingRule
            StartDate = 1-may
            EndDate = 10-jul
            MinESW = 100
            MinRain = 25
            RainDays = 7
            CultivarName = Hartog
            SowingDepth = 30
            RowSpacing = 250
            Population = 120
```csharp
using Models.Interfaces;
using APSIM.Shared.Utilities;
using Models.Utilities;
using Models.Soils;
using Models.PMF;
using Models.Core;
using System;
using Models.Climate;

namespace Models
{
    [Serializable]
    public class Script : Model
    {
        [Link] private Clock Clock;
        [Link] private Fertiliser Fertiliser;
        [Link] private Summary Summary;
        [Link] private Plant Wheat;
        [Link] private Soil Soil;
        private Accumulator accumulatedRain;
        [Link]
        private ISoilWater waterBalance;
        
        [Description("Start of sowing window (d-mmm)")]
        public string StartDate { get; set;}
        [Description("End of sowing window (d-mmm)")]
        public string EndDate { get; set;}
        [Description("Minimum extractable soil water for sowing (mm)")]
        public double MinESW { get; set;}
        [Description("Accumulated rainfall required for sowing (mm)")]
        public double MinRain { get; set;}
        [Description("Duration of rainfall accumulation (d)")]
        public int RainDays { get; set;}
        [Description("Cultivar to be sown")]
        public string CultivarName { get; set;}
        [Description("Sowing depth (mm)")]
        public double SowingDepth { get; set;}        
        [Description("Row spacing (mm)")]
        public double RowSpacing { get; set;}    
        [Description("Plant population (/m2)")]
        public double Population { get; set;}    
        
        
        [EventSubscribe("StartOfSimulation")]
        private void OnSimulationCommencing(object sender, EventArgs e)
        {
            accumulatedRain = new Accumulator(this, "[Weather].Rain", RainDays);
        }
        

        [EventSubscribe("DoManagement")]
        private void OnDoManagement(object sender, EventArgs e)
        {
            accumulatedRain.Update();
            
            if (DateUtilities.WithinDates(StartDate,Clock.Today,EndDate) &&
                !Wheat.IsAlive &&
                MathUtilities.Sum(waterBalance.ESW) > MinESW &&
                accumulatedRain.Sum > MinRain)
            {
               Wheat.Sow(population:Population, cultivar:CultivarName, depth:SowingDepth, rowSpacing:RowSpacing);    
            }
        
        }
        
    }
}
```
        SoilArbitrator
      DataStore
      Simulation 40N
        Clock: Start=1900-01-01; End=2000-12-31
        Summary SummaryFile
        Weather: FileName=%root%/Examples/WeatherFiles/AU_Dalby.met; Latitude=-27.18; Tav=19.09; Amp=14.63
        Zone Field: Area=1; Slope=0; AspectAngle=0; Altitude=50
          Report: same as Completed Simulations.Exercise 4.0N.Field.Report
          Fertiliser
          Soil: same as Completed Simulations.Exercise 4.0N.Field.Soil
          SurfaceOrganicMatter: InitialResidueName=wheat_stubble; InitialResidueType=wheat; InitialResidueMass=500; InitialStandingFraction=0; InitialCPR=0; InitialCNR=100
          Plant Wheat
          MicroClimate: a_interception=0; b_interception=1; c_interception=0; d_interception=0; SoilHeatFluxFraction=0.4; MinimumHeightDiffForNewLayer=0; NightInterceptionFraction=0.5; ReferenceHeight=2
          Manager SowingFertiliser
            Amount = 40
            CropName = wheat
            script: same as in Completed Simulations.Exercise 4.0N.Field.SowingFertiliser
          Manager SowingRule: same as Completed Simulations.Exercise 4.0N.Field.SowingRule
        SoilArbitrator
      Simulation 80N
        Clock: Start=1900-01-01; End=2000-12-31
        Summary SummaryFile
        Weather: FileName=%root%/Examples/WeatherFiles/AU_Dalby.met; Latitude=-27.18; Tav=19.09; Amp=14.63
        Zone Field: Area=1; Slope=0; AspectAngle=0; Altitude=50
          Report: same as Completed Simulations.Exercise 4.0N.Field.Report
          Fertiliser
          Soil: same as Completed Simulations.Exercise 4.0N.Field.Soil
          SurfaceOrganicMatter: InitialResidueName=wheat_stubble; InitialResidueType=wheat; InitialResidueMass=500; InitialStandingFraction=0; InitialCPR=0; InitialCNR=100
          Plant Wheat
          MicroClimate: a_interception=0; b_interception=1; c_interception=0; d_interception=0; SoilHeatFluxFraction=0.4; MinimumHeightDiffForNewLayer=0; NightInterceptionFraction=0.5; ReferenceHeight=2
          Manager SowingFertiliser
            Amount = 80
            CropName = wheat
            script: same as in Completed Simulations.Exercise 4.0N.Field.SowingFertiliser
          Manager SowingRule: same as Completed Simulations.Exercise 4.0N.Field.SowingRule
        SoilArbitrator
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