Simulations: Version=69
  DataStore
  Simulation AgPastureExample
    Clock: Start=1980-07-01; End=1985-06-30
    Weather: FileName=%root%\Examples\WeatherFiles\lincoln.met
    SoilArbitrator
    Summary
    Zone Field: Area=1; Slope=0; AspectAngle=0; Altitude=50
      Manager Defoliate
        Verbose = False
        GrazingRotationType = TargetMassAndLength
        SimpleGrazingFrequency = 0
        SimpleGrazingResidual = 0
        SimpleMinGrazable = 0
        PreGrazeDMArray =
        PostGrazeDMArray =
        RotationLengthArray =
        NoGrazingWindow =
        NoGrazingStartString =
        NoGrazingEndString =
        DaysSinceGraze = 0
        GrazingInterval = 0
        ListOfPatches =
        ListOfDepths =
        ListOfAmounts =
        DepositionsPerGrid =
        NumPatchesForUrine = 0
        Grazed = 0
        GrazedN = 0
        GrazedME = 0
        PropIngestedNAsDung = 0
        AreaUrinePatchesToday = 0
        AmountUrineNReturned = 0
        AmountDungNReturned = 0
        HerbageMassPreGraze = 0
        StockingDensity = 0
        StandingBiomass = 0
        PostGrazeDM = 0
        LoadAdjustmentPropOverall = 0
        LoadAdjustmentGrammesIndividual = 0
        AverageUrineDepth = 0
        GrazedToday =
        UrineNReturned = 0
```csharp
using System;
using System.Collections.Generic;
using System.Xml.Serialization;
using Models.Core;
using Models.PMF;
using Models.PMF.Interfaces;
using Models.Soils;
using APSIM.Shared.Utilities;
using Models.Interfaces;
using Models.Soils.Nutrients;
using Models.Surface;

namespace Models
{
	[Description("asdf")]
    [Serializable]
    public class Script : Model
    {
        [Link] Simulation simulation;
        [Link] Clock clock;  
        [Link] Fertiliser Fertiliser;
	    [Link] SoilWater SoilWat;  
	    [Link] Nutrient SoilNitrogen;
	    [Link] SurfaceOrganicMatter SurfaceOM;
	    [Link] ISummary summary;
	    [Link] List<IRemovableBiomass> forages;

		private DateTime NoGrazingStart; 
		private DateTime NoGrazingEnd; 
		private double CowBodyWeight = 450.0;           // kg
	    private string CowDateCalving = "1-aug";
	    private string CowDateInCalf = "1-nov";
	    private string CowDateDryOff = "30-apr";
	    private double CowMSPerDay = 0.0;               // kgMS/day/head
	    private double CowMSEnergyPerKg = 77.0;         // MJME/kg MS (trying 77 c.f. 80)
	    private double CowWalkingDist = 3.0;
	    private double CowWalkingEnergyPerKm = 2.0;     // MJME/km
	    private double[] CowN2BodyPerc = {30.0, 10.0};  // Percent N in intake to body and product for milking and dry
	    private double[] CowN2UrinePerc = {42.0, 54.0}; // Percent N in intake to uriney and product for milking and dry
	    private double[] CowN2DungPerc = {28.0, 36.0};  // Percent N in intake to dung and product for milking and dry
	    private double[] LactationCurveParam = {20.0, 0.2, -0.04, 0.092}; // Parameters for the lactation curve, last parm 0.113 will give 500 kg MS, 0.092 will give 406 kg MS
	    private string CowState = "Dry-Pregnant";
	    private double WeeksBeforeCalving = 0.0;
	    private double LactationWeek = 0.0;
	    private double CowMEDemand = 0.0;
	    private double CowDMIntake = 0.0;
	    private double HerdMEDemand = 0.0;
	    private double SilageMade = 0.0;
	    private double SilageFed = 0.0;
	    private double SilageNFed = 0.0;
	    private double SilageMEFed = 0.0;
	    private double[] CowPregnancyParam = {72.154, -0.143}; // multiplier and exponential parameters for pregnancy energy (35 kg calf), time in weeks before
        private double CowMaintME = 54.0;                      // MJME/day https://www.dairynz.co.nz/media/5789573/facts_and_figures_web_chapter4_cow_feed_requirements.pdf page 4 450- kg cow
	    private int PatchNumForUrine = -1;
	    private double AmountDungCReturned = 0.0;
	    private double iniOrgC;
	    private double iniOrgN;
	    private double[] UrineDepthPlacement;
	    private double myResidual;
 	    private bool GrazeNow = false;
	    private Random rndConstSeed = new Random((int) 666);  // constand-seed random number for the pseudo-random return pattern
	    private Random rndRandom = new Random();              // random-seed random number generator for the random return pattern
	    private double[] ArrayLoad;
	    private double[] ArrayArea;
	    private double[] ArrayDepth;
	    private double[] ArrayVol;
	    private double slopeVolWithLoad;
	    private double incrWaterContent = 0.05;               // increase in volumetric water content - used ot calculate depth

	    // Enums for drop downs
	    public enum GrazingRotationTypeEnum
	    {
	    	SimpleRotation,
	    	TargetMass,
	    	TargetMassAndLength
	    }


	    // Parameters

		[Description("Verbose mode - write many informational statements to the Summary file")]
        public bool Verbose { get; set; }
   
	    [Separator("Grazing parameters")]
	    [Description("Use a strict rotation, a target pasture mass, or both?")]
	    [Units("-")] 
	    public GrazingRotationTypeEnum GrazingRotationType { get; set; } 


	    [Separator("Settings for the 'Simple Rotation'")]
	    [Description("Frequency of grazing (days) (0 will be interpreted as the end of each month)")]
	    [Units("days")] 
	    [Display(EnabledCallback="IsSimpleGrazingTurnedOn")]
	    public int SimpleGrazingFrequency { get; set; } 


	    [Description("Residual pasture mass after grazing (kg DM /ha)")]
	    [Units("kgDM/ha")] 
	    [Display(EnabledCallback="IsSimpleGrazingTurnedOn")]
	    public double SimpleGrazingResidual { get; set; } 

	    [Description("Minimum grazeable dry matter to trigger grazing (kg DM/ha)")]
	    [Units("kgDM/ha")] 
	    [Display(EnabledCallback="IsSimpleGrazingTurnedOn")]
	    public double SimpleMinGrazable { get; set; }

	    [Separator("Settings for the 'Target Mass' and 'Maximum Rotation Length' - all values by month from January")]
	    [Description("Monthly target mass of pasture to trigger grazing event (kg DM/ha)")]
	    [Units("kgDM/ha")] 
	    [Display(EnabledCallback="IsTargetMassTurnedOn,IsTargetMassAndLengthTurnedOn")]
	    public double[] PreGrazeDMArray { get; set; }

	    [Description("Monthly mass of pasture past grazing (kg DM/ha)")]
	    [Units("kgDM/ha")] 
	    [Display(EnabledCallback="IsTargetMassTurnedOn,IsTargetMassAndLengthTurnedOn")]
	    public double[] PostGrazeDMArray { get; set; }

	    [Description("Monthly maximum rotation length (days)")]
	    [Units("days")] 
	    [Display(EnabledCallback="IsTargetMassAndLengthTurnedOn")]
	    public double[] RotationLengthArray { get; set; }

	    [Separator("Optional no-grazing window")]
	    [Description("Implement the no-grazing window")]
	    public string NoGrazingWindow { get; set; }

  	    [Description("Start of the no-grazing window")]
	    public string NoGrazingStartString { get; set; }

   	    [Description("End of the no-grazing window")]
	    public string NoGrazingEndString { get; set; }
	
	    //public event AddSoilCNPatchDelegate AddSoilCNPatch;

	    // OUTPUTS

	    public int DaysSinceGraze { get; set; }
	    public int GrazingInterval { get; set; }
	    public string ListOfPatches { get; set; }       // a list (string) of patch numbers that the urine is returned to today using "|" as a seperator
	    public string ListOfDepths { get; set; }  
	    public string ListOfAmounts { get; set; }
	    public string DepositionsPerGrid { get; set; }
	    public int NumPatchesForUrine { get; set; }     // number of patches used for urine return (depends on the amount of herbage grazed)

	    [Units("kgDM/ha")] 
	    public double Grazed { get; set; }  // DM grazed

	    [Units("kgN/ha")] 
	    public double GrazedN { get; set; }   // N in the DM grazed

	    [Units("MJME/ha")] 
	    public double GrazedME { get; set; }   // N in the DM grazed

	    [Units("-")] 
	    public double PropIngestedNAsDung { get; set; }

	    [Units("m2")] 
	    public double  AreaUrinePatchesToday { get; set; } 
	    
	    [Units("kgN/ha")] 
	    public double AmountUrineNReturned { get; set; }  // N in urine returned to the paddock
	    
	    [Units("kgN/ha")] 
	    public double AmountDungNReturned { get; set; }  // N in dung returned to the paddock
	    
	    [Units("kgDM/ha")] 
	    public double HerbageMassPreGraze { get; set; }  // mass of herbage just before greazing
	    
	    [Units("head/ha")] 
	    public double StockingDensity { get; set; }
	    
	    [Units("kgDM/ha")] 
	    public double StandingBiomass { get; set; }
	    
	    [Units("kgDM/ha")] 
	    public double PostGrazeDM { get; set; }
	    
	    [Units("-")] 
	    public double LoadAdjustmentPropOverall { get; set; }
	    
	    [Units("-")] 
	    public double LoadAdjustmentGrammesIndividual { get; set; }
	    
	    [Units("mm")] 
	    public double AverageUrineDepth { get; set; }
	    
	    public string GrazedToday { get; set; }
	    
	    [Units("kgN/ha")] 
	    public double UrineNReturned { get; set; }  // is this needed?


	    public bool IsSimpleGrazingTurnedOn
	    {
	    	get
	    	{
	    		return GrazingRotationType == GrazingRotationTypeEnum.SimpleRotation;
	    	}
	    }

  	    public bool IsTargetMassTurnedOn
	    {
	    	get
	    	{
	    		return GrazingRotationType == GrazingRotationTypeEnum.TargetMass;
	    	}
	    }

  	    public bool IsTargetMassAndLengthTurnedOn
	    {
	    	get
	    	{
	    		return GrazingRotationType == GrazingRotationTypeEnum.TargetMassAndLength;
	    	}
	    }



	    /// <summary>This method is invoked at the beginning of the simulation.</summary>
        [EventSubscribe("Commencing")]
        private void OnSimulationCommencing(object sender, EventArgs e)
        {
            if (Verbose)
         	    summary.WriteMessage(this, "Initialising the Manager for grazing, urine return and reporting");
      
		    if (PreGrazeDMArray.Length != 12)
		       throw new Exception("There must be 12 values input for the pre-grazing DM");
		    if (PostGrazeDMArray.Length != 12)
		       throw new Exception("There must be 12 values input for the post-grazing DM");
		    if (RotationLengthArray.Length != 12)
		       throw new Exception("There must be 12 values input for rotation length");
		    
		    if (Verbose)
		       summary.WriteMessage(this, "Finished initialising the Manager for grazing, urine return and reporting");
		    NoGrazingStart = DateUtilities.GetDate(NoGrazingStartString);
		    NoGrazingEnd = DateUtilities.GetDate(NoGrazingEndString);
        }
        
        /// <summary>This method is invoked at the beginning of each day to perform it's management actions.</summary>
        [EventSubscribe("DoManagement")]
        private void OnDoManagement(object sender, EventArgs e)
        {
			DaysSinceGraze += 1;
			PostGrazeDM = 0.0;
			Grazed = 0.0;
			GrazedN = 0.0;
			GrazedME = 0.0;
			SilageMade = 0.0;
			SilageFed = 0.0;
			SilageNFed = 0.0;
			SilageMEFed = 0.0;

			UrineNReturned = 0.0;
			ListOfPatches = "|";
			ListOfDepths = "|";
			ListOfAmounts = "|";
			DepositionsPerGrid = "|";
			AreaUrinePatchesToday = 0.0;
			NumPatchesForUrine = 0;
			HerbageMassPreGraze = 0.0;
			foreach (var forage in forages)
			    HerbageMassPreGraze += forage.Live.Wt + forage.Dead.Wt;
      
			GrazeNow = false;
			GrazedToday = "no";
			StockingDensity = 0.0;

			if (GrazingRotationType == GrazingRotationTypeEnum.SimpleRotation)
			    SimpleRotation();
			else if (GrazingRotationType == GrazingRotationTypeEnum.TargetMass)
			    TargetMass();
			else if (GrazingRotationType == GrazingRotationTypeEnum.TargetMassAndLength)
			   TargetMassAndLength();
			else
			 throw new Exception("Grazing rotation type not recognised");         

			if (clock.Today.DayOfYear >= NoGrazingStart.DayOfYear && clock.Today.DayOfYear <= NoGrazingEnd.DayOfYear && (NoGrazingWindow.StartsWith("y") || NoGrazingWindow.StartsWith("Y")))
			{
			 	GrazeNow = false;
			 	GrazedToday = "no";
			}
      

			if (GrazeNow)
			{
				if (Verbose)
			    	summary.WriteMessage(this, "Doing grazing");
			 	GrazedToday = "yes";
			 	GrazingInterval = DaysSinceGraze;  // i.e.. yesterday's value
			 	DaysSinceGraze = 0;

			 	foreach (var forage in forages)
			 	{
				    // GrazeType GZ = new GrazeType();
				    // GZ.amount = (float) myResidual;
				    // GZ.type = "SetResidueAmount";
				    // GZ.sender = "DoGrazing";
				    // AgPasture.Graze(GZ);


				    // Grazed += AgPasture.HarvestedWt;
				    // GrazedN += AgPasture.HarvestedN;
				    // GrazedME += AgPasture.HarvestedME * Grazed;
				    // PostGrazeDM = +AgPasture.AboveGroundWt;
				}
			}
        }

        [EventSubscribe("DoManagementCalculations")]
        private void OnDoManagementCalculations(object sender, EventArgs e)
        {
        }

        private void SimpleRotation()
        {
        	bool isEndOfMonth = clock.Today.AddDays(1).Day == 1;
			if ((SimpleGrazingFrequency == 0 && isEndOfMonth) || (DaysSinceGraze >= SimpleGrazingFrequency && SimpleGrazingFrequency > 0))
			{
				// see if there is enough biomass to do the grazing, can set this to 0 in the UI if needed
				StandingBiomass = 0.0;
				foreach (var forage in forages)
					StandingBiomass += forage.Live.Wt + forage.Dead.Wt;
				
				if (StandingBiomass > SimpleGrazingResidual + SimpleMinGrazable)  
				{
					GrazeNow = true;
					GrazedToday = "yes";
				}
				myResidual = SimpleGrazingResidual;
	        }
        }

        private void TargetMass()
        {
			// assess standing biomass and graze if above target
			StandingBiomass = 0.0;
			foreach (var forage in forages)
			    StandingBiomass += forage.Live.Wt + forage.Dead.Wt;

			if (StandingBiomass > PreGrazeDMArray[clock.Today.Month - 1])  
			{
			    GrazeNow = true;
			    GrazedToday = "yes";
			}
			myResidual = PostGrazeDMArray[clock.Today.Month - 1];
        }

        private void TargetMassAndLength()
        {
			// assess standing biomass and time since the last grazing and graze if above target or longer than rotation length
			StandingBiomass = 0.0;
			foreach (var forage in forages)
				StandingBiomass += forage.Live.Wt + forage.Dead.Wt;

			if ((StandingBiomass > PreGrazeDMArray[clock.Today.Month - 1] || DaysSinceGraze > RotationLengthArray[clock.Today.Month - 1]) 
			     && StandingBiomass > PostGrazeDMArray[clock.Today.Month - 1] && DaysSinceGraze > 14)  // does have to be grazable!
			{
				GrazeNow = true;
				GrazedToday = "yes";
			}
			myResidual = PostGrazeDMArray[clock.Today.Month - 1];
        }
    }
}
```
      Manager FertiliseFixedDates
        EachYear = True
        Dates = 5-jan,5-feb,5-mar,5-apr,5-aug,5-sep,5-oct,5-nov,5-dec
        UseCritNThreshold = False
        CritNThreshold = 50
        CritNDepth = 75
        Depth = 50
        Amount = 15
        FertiliserType = UreaN
```csharp
using System;
using Models.Core;
using Models.Soils;
using Models.Soils.Nutrients;
using Models.PMF;
using APSIM.Shared.Utilities;
using System.Linq;

namespace Models
{
    [Serializable]
    public class Script : Model
    {
        [Link] Clock clock;
        [Link] Fertiliser fertiliser;
        [Link] ISummary summary;
        [Link] Soil soil;

        private Nutrient nutrient;
        private SoilNitrogen soilN;

        [Separator("Fertiliser will be applied on the date(s) below")]
        [Description("Apply fertiliser on the same day(s) each year? If no, then must include the year of appliaction below")]
        public bool EachYear { get; set; }

        [Description("Dates for one or more fertiliser applications (dd-mmm or dd-mmm-yyyy) as a list with a comma between dates")]
        public string[] Dates { get; set; }

        [Separator("Test for the mineral N in the soil and don't apply the fertiliser if greater than X kgN/ha is stored in the soil above a depth of Y mm")]
        [Description("Use a critical soil mineral N to prevent application above a threshold?")]
        public bool UseCritNThreshold { get; set; }

        [Description("Don't add fertiliser if N in the soil to the depth below exceeds (kg/ha)")]
        public double CritNThreshold { get; set; }

        [Description("Depth to which the amount of N in the soil should be calculated (mm)")]
        public double CritNDepth { get; set; }

        [Separator("Fertiliser application details")]
        [Description("Depth at which to apply the fertiliser (mm)")]
        public double Depth { get; set; }

        [Description("Amount of fertiliser to apply (kg N /ha) per application")]
        public double Amount { get; set; }

        [Description("Fertiliser type - select from the list")]
        public Fertiliser.Types FertiliserType { get; set; }


        [EventSubscribe("StartOfSimulation")]
        private void FindSoilNOrNutrient(object sender, EventArgs e)
        {
            nutrient = Apsim.Find(this, typeof(Nutrient)) as Nutrient;
            soilN = Apsim.Find(this, typeof(SoilNitrogen)) as SoilNitrogen;

            if (nutrient == null && soilN == null)
                throw new Exception(string.Format("Error in script {0}: Unable to find nutrient or soilN.", Name));
        }

        [EventSubscribe("DoManagement")]
        private void OnDoManagement(object sender, EventArgs e)
        {
            if (OnApplicationDate())
            {
                if (NContentBelowThreshold())
                    fertiliser.Apply(Amount, FertiliserType, Depth);
                else
                    summary.WriteMessage(this, "Skipping fertiliser application due to soil mineral N content being above critical threshold.");
            }
        }

        /// <summary>Checks if today's date is one of the specified fertiliser application dates.</summary>
        private bool OnApplicationDate()
        {
            if (EachYear)
                return Dates.Any(d => DateUtilities.DatesEqual(d, clock.Today));
            
            DateTime[] dates = Dates.Select(d => DateTime.ParseExact(d, "d-MMM-yyyy", null)).ToArray();
            return dates.Any(d => SameDate(d, clock.Today));
        }

        /// <summary>Checks if N content in soil is below critical threshold.</summary>
        private bool NContentBelowThreshold()
        {
            if (!UseCritNThreshold)
                return true;
            
            double[] weights = GetLayerWeights();
            double cumSoilN = 0;

            for (int i = 0; i < soil.Thickness.Length; i++)
            {
                if (nutrient != null)
                    cumSoilN += weights[i] * nutrient.MineralN[i];
                else if (soilN != null)
                    cumSoilN += weights[i] * soilN.mineral_n[i];
            }

            return cumSoilN <= CritNThreshold;
        }

        private double[] GetLayerWeights()
        {
            double[] weights = new double[soil.Thickness.Length];
            double cumDepth = 0;

            for (int i = 0; i < soil.Thickness.Length; i++)
            {
                cumDepth += soil.Thickness[i];
                if (cumDepth < CritNDepth)
                    weights[i] = 1;
                else if (cumDepth - soil.Thickness[i] <= CritNDepth)
                    weights[i] = (CritNDepth - (cumDepth - soil.Thickness[i])) / soil.Thickness[i];
                else
                    weights[i] = 0;
            }

            return weights;
        }

        private bool SameDate(DateTime d1, DateTime d2)
        {
            return d1.Year == d2.Year && d1.DayOfYear == d2.DayOfYear;
        }
    }
}
```
      Manager AutomaticIrrigation
        allowIrrigation = True
        seasonStart = 1-sep
        seasonEnd = 30-apr
        seasonsAllocation = 10000
        triggerDeficit = 75
        targetDeficit = 95
        returndays = 3
        maximumAmount = 30
        depthPAWC = 300
```csharp
using System;
using Models.Core;
using Models.PMF;
using Models.Soils;
using System.Xml.Serialization;
using Models.PMF;
using APSIM.Shared.Utilities;

        
namespace Models
{
    [Serializable] 
    [System.Xml.Serialization.XmlInclude(typeof(Model))]
    public class Script : Model
    {
        //Communication to other modules
        [Link] ISummary summary = null;
        [Link] Irrigation Irrigation;
        [Link] Clock Clock;
        [Link] Soil Soil;
        [Link(IsOptional = true)] IPlant existingCrop;
       
        //User inputs from properties tab
        [Description("Turn irrigation on?")]
        public bool allowIrrigation { get; set; }
        [Description("Start of irrigation season (dd-MMM)")]
        public string seasonStart { get; set; }
        [Description("End of irrigation season (dd-MMM)")]
        public string seasonEnd { get; set; }
        [Description("Season allocation (mm)")]
        public double seasonsAllocation { get; set; }
        [Description("Deficit to trigger irrigation (% PAWC)")]
        public double triggerDeficit { get; set; }
        [Description("Deficit to stop irrigaton (% PAWC)")]
        public double targetDeficit { get; set; }
        [Description("Minimum days for irrigation to return")]
        public double returndays { get; set; }
        [Description("Maximum irrigation application (mm/day)")]
        public double maximumAmount { get; set; }
        [Description("Depth to calculate PAWC (mm)")]
        public double depthPAWC { get; set; }

        //Class members
        [XmlIgnore] public double TopSWdeficit { get; set; }
        [XmlIgnore] public double TopSWC { get; set; }
        [XmlIgnore] public double DaysSinceIrrigation { get; set; }
        [XmlIgnore] public double AmountToApply { get; set; }
        [XmlIgnore] public double SeasonAppliedAmount { get; set; }
        
        private bool IrrigationIsAllowed { get; set; }
        private bool SeasonIsOpen { get; set; }
        private bool CropIsActive { get; set; }
        private bool IrrigatorIsAvailable { get; set; }
        private bool SoilIsDry { get; set; }

        private DateTime StartDate;
        private DateTime EndDate;
        private double TopDUL;
        private double TopLL;
        private int nLayers;
    
        //Calculate static soil variables
        [EventSubscribe("StartOfSimulation")]
        private void OnStartOfSimulation(object sender, EventArgs e)
        {   
            //Set the season dates
            StartDate = DateTime.Parse(seasonStart + "-" + Clock.Today.Year.ToString());
            EndDate = DateTime.Parse(seasonEnd + "-" + Clock.Today.Year.ToString());
            
            //Can we irrigate at all?
            IrrigationIsAllowed = false; 
            if (allowIrrigation)
                IrrigationIsAllowed = true; 

            //Calculate soil water variables
            double depthFromSurface = 0.0;
            double fracLayer = 0.0;
            nLayers = Soil.Thickness.Length;
            for (int layer = 0; layer < nLayers; layer++)
            {
                fracLayer = Math.Min(1.0, (depthPAWC - depthFromSurface) / Soil.Thickness[layer]);
                TopLL += Soil.LL15mm[layer] * fracLayer;
                TopDUL += Soil.DULmm[layer] * fracLayer;
                depthFromSurface += Soil.Thickness[layer];
                if (depthFromSurface >= depthPAWC)
                    layer = nLayers;
            }
        }
             
        //Determine daily requirement for irrigation
        [EventSubscribe("StartOfDay")]
        private void OnStartOfDay(object sender, EventArgs e)
        {
            //Can we irrigate today?          
            SeasonIsOpen = isBetween(Clock.Today, StartDate, EndDate);

            //Is there a crop in the ground that needs irrigation?
            CropIsActive = false;
            if ((existingCrop != null) && (existingCrop.IsAlive))
                CropIsActive = true;
            //if ((existingCrop.Phenology.Stage >= 3.0) && (existingCrop.Phenology.Stage < 6.0))
          
            //Is the irrigator available?
            IrrigatorIsAvailable = false;
            DaysSinceIrrigation += 1;
            if (DaysSinceIrrigation >= returndays)
                IrrigatorIsAvailable = true;
          
            //Is the soil dry enough to require irrigation?
            SoilIsDry = false;
            double depthFromSurface = 0.0;
            double fracLayer = 0.0;
            TopSWC = 0.0;
            for (int layer = 0; layer < nLayers; layer++)
            //for (int layer = 0; depthFromSurface < depthPAWC + Soil.Thickness[layer]; layer++)
            {
                fracLayer = Math.Min(1.0, (depthPAWC - depthFromSurface) / Soil.Thickness[layer]);
                TopSWC += Soil.SoilWater.SWmm[layer] * fracLayer;
                depthFromSurface += Soil.Thickness[layer];
                if (depthFromSurface >= depthPAWC)
                    layer = nLayers;
            }
            
            TopSWdeficit = TopSWC - TopDUL;
            if (Math.Max(0.0, -TopSWdeficit) >= (TopDUL - TopLL) * (100 - triggerDeficit) / 100)
                SoilIsDry = true;
                
            //Are all the conditions ratifying irrigation
            if (IrrigationIsAllowed && SeasonIsOpen && CropIsActive && IrrigatorIsAvailable && SoilIsDry)
            {
                //Lets bloody well irrigate then!!!!
                AmountToApply = TopDUL * targetDeficit / 100 - TopSWC;
                AmountToApply = Math.Max(0.0, Math.Min(AmountToApply, seasonsAllocation - SeasonAppliedAmount));
                Irrigation.Apply(AmountToApply);
                DaysSinceIrrigation = 0;
                SeasonAppliedAmount += AmountToApply;
            }
        }
        
        ///Checks whether theDate is between iniDate and endDate (non-year specific)
        private bool isBetween(DateTime theDay, DateTime iniDate, DateTime endDate)
        {
            bool result = false;
            if (iniDate.DayOfYear < endDate.DayOfYear)
            {
                // period is within one year, ex: summer in the northern hemisphere
                if ((theDay.DayOfYear >= iniDate.DayOfYear) && (theDay.DayOfYear <= endDate.DayOfYear))
                    result = true;
            }
            else
            {
                // period goes over the end of the year, ex: summer in the southern hemisphere
                if ((theDay.DayOfYear >= iniDate.DayOfYear) || (theDay.DayOfYear <= endDate.DayOfYear))
                    result = true;
            }
            
            return result;
        }
    }
}
```
      MicroClimate: a_interception=0; b_interception=1; c_interception=0; d_interception=0; soil_albedo=0.23; SoilHeatFluxFraction=0.4; NightInterceptionFraction=0.5; ReferenceHeight=2
      Irrigation
      Fertiliser
      SurfaceOrganicMatter: InitialResidueName=Sward; InitialResidueType=grass; InitialResidueMass=1000; InitialStandingFraction=0; InitialCPR=0; InitialCNR=15; FractionFaecesAdded=0.5
      Soil: SoilType=NZ_Sedimentary; LocalName=Lismore; Site=Winchmore; NearestTown=Ashburton; Region=Canterbury; Country=New Zealand; Latitude=-48.48; Longitude=0
        Chemical
          Thickness  NO3N  NH4N  PH
          150        5     0.1   6
          150        2.5   0.1   6
          200        1     0.1   6
          150        0.75  0.1   6
          250        0.5   0.1   6
          300        0.5   0.1   6
          300        0.5   0.1   6
        Physical
          Thickness  ParticleSizeClay  BD    AirDry  LL15   DUL    SAT   KS
          150        20                1.3   0.05    0.15   0.36   0.45  5000
          150        15                1.35  0.12    0.14   0.34   0.43  2500
          200        12                1     0.055   0.055  0.19   0.25  3000
          150        8                 0.53  0.015   0.015  0.065  0.15  10000
          250        6                 0.31  0.01    0.01   0.04   0.11  17500
          300        5                 0.3   0.01    0.01   0.03   0.11  20000
          300        5                 0.3   0.01    0.01   0.03   0.11  20000
          SoilCrop AGPRyegrassSoil: LL=[0.15, 0.14, 0.06, 0.02, 0.01, 0.01, 0.01]; KL=[0.1, 0.1, 0.08, 0.04, 0.01, 0, 0]; XF=[1, 1, 1, 1, 1, 0, 0]
          SoilCrop AGPWhiteCloverSoil: LL=[0.15, 0.14, 0.06, 0.02, 0.01, 0.01, 0.01]; KL=[0.1, 0.1, 0.08, 0.04, 0.01, 0, 0]; XF=[1, 1, 1, 1, 1, 0, 0]
        SoilWater: SummerDate=1-Nov; SummerU=6; SummerCona=3.5; WinterDate=1-apr; WinterU=2; WinterCona=2; DiffusConst=88; DiffusSlope=35; Salb=0.13; CN2Bare=73; CNRed=20; CNCov=0.8; slope=0; discharge_width=0; catchment_area=0; max_pond=0; PrecipitationInterception=0
          Thickness  SWCON  KLAT
          150        0.5    0
          150        0.52   0
          200        0.55   0
          150        0.6    0
          250        0.65   0
          300        0.65   0
          300        0.65   0
        SoilNitrogen: fom_types=[default, manure, mucuna, lablab, shemp, stable]; fract_carb=[0.2, 0.3, 0.54, 0.57, 0.45, 0]; fract_cell=[0.7, 0.3, 0.37, 0.37, 0.47, 0.1]; fract_lign=[0.1, 0.4, 0.09, 0.06, 0.08, 0.9]
          SoilNitrogenNO3 NO3
          SoilNitrogenNH4 NH4
          SoilNitrogenUrea Urea
          SoilNitrogenPlantAvailableNO3 PlantAvailableNO3
          SoilNitrogenPlantAvailableNH4 PlantAvailableNH4
        Organic: FOMCNRatio=40
          Thickness  Carbon  SoilCNRatio  FBiom  FInert  FOM
          150        3       12           0.04   0.5     331.337
          150        1       12           0.02   0.7     245.461
          200        0.6     12           0.02   0.83    164.537
          150        0.4     12           0.01   0.9     121.892
          250        0.25    12           0.01   0.95    73.9313
          300        0.15    12           0      0.99    40.5743
          300        0.1     12           0      0.99    22.2677
        InitialWater Initial water: PercentMethod=1; FractionFull=0.95
        Sample Initial nitrogen: Thickness=[150, 150, 200, 150, 250, 300, 300]; SWUnits=Volumetric; OCUnits=Total; PHUnits=Water
        CERESSoilTemperature
      PastureSpecies AGPRyegrass: MaximumNUptake=10; Albedo=0.26; Gsmax=0.011; R50=200; InitialShootDM=1500; InitialRootDM=450; InitialRootDepth=750; ReferencePhotosyntheticRate=1; LightExtinctionCoefficient=0.5; GrowthTminimum=1; GrowthToptimum=20; GrowthTEffectExponent=1.7; HeatOnsetTemperature=28; HeatFullTemperature=35; HeatRecoverySumDD=30; HeatRecoveryTReference=25; ColdOnsetTemperature=1; ColdFullTemperature=-5; ColdRecoverySumDD=25; MaintenanceRespirationCoefficient=0.03; GrowthRespirationCoefficient=0.25; RespirationTReference=20; RespirationExponent=1.5; NThresholdsForLeaves=[0.04, 0.012, 0.05]; NThresholdsForStems=[0.02, 0.006, 0.025]; NThresholdsForStolons=[0, 0, 0]; NThresholdsForRoots=[0.02, 0.006, 0.025]; DegreesDayForGermination=125; TargetShootRootRatio=4; MaxRootAllocation=0.25; ShootRootGlfFactor=0.5; ReproSeasonReferenceLatitude=41; ReproSeasonTimingCoeff=0.14; ReproSeasonMaxAllocationIncrease=0.5; ReproSeasonAllocationCoeff=0.1; FractionLeafMaximum=0.7; FractionLeafMinimum=0.7; FractionLeafDMThreshold=500; FractionLeafDMFactor=2000; FractionLeafExponent=3; SpecificLeafArea=20; SpecificRootLength=100; ShootMaxEffectOnLAI=1000; MaxStemEffectOnLAI=1; LiveLeavesPerTiller=3; TissueTurnoverRateShoot=0.05; TissueTurnoverRateRoot=0.02; DetachmentRateShoot=0.08; TurnoverTemperatureMin=2; TurnoverTemperatureRef=20; TurnoverTemperatureExponent=1; TurnoverDroughtEffectMax=1; TurnoverDroughtThreshold=0.5; TurnoverDefoliationCoefficient=0.5; TurnoverDefoliationRootEffect=0.1; FractionNLuxuryRemobilisable=[0.1, 0.1, 0.1]; SoilSaturationEffectMax=0.1; MinimumWaterFreePorosity=-1; SoilSaturationRecoveryFactor=0.25; NDillutionCoefficient=0.25; GlfGeneric=1; GlfSoilFertility=1; PlantHeightMinimum=300; PlantHeightMaximum=300; PlantHeightMassForMax=10000; PlantHeightExponent=2.8; RootDepthMinimum=50; RootDepthMaximum=1000; RootElongationRate=25; RootDistributionDepthParam=250; RootDistributionExponent=3.2; DigestibilitiesCellWall=[0.9, 0.7, 0.6, 0.2]; MinimumGreenWt=100; PreferenceForGreenOverDead=1; PreferenceForLeafOverStems=1
        zero: SpeciesFamily, PhotosyntheticPathway, UseHeatStressFactor, UseColdStressFactor, ColdRecoveryTReference, UseReproSeasonFactor, FractionToStolon, StolonEffectOnLAI, MinimumNFixation, MaximumNFixation, FractionStolonStanding, WaterAvailableMethod, NitrogenAvailableMethod
      PastureSpecies AGPWhiteClover: MaximumNUptake=10; Albedo=0.26; Gsmax=0.011; R50=200; SpeciesFamily=1; PhotosyntheticPathway=0; InitialShootDM=500; InitialRootDM=150; InitialRootDepth=350; ReferencePhotosyntheticRate=1; LightExtinctionCoefficient=0.8; GrowthTminimum=2; GrowthToptimum=22; GrowthTEffectExponent=1.7; UseHeatStressFactor=0; HeatOnsetTemperature=30; HeatFullTemperature=36; HeatRecoverySumDD=20; HeatRecoveryTReference=25; UseColdStressFactor=0; ColdOnsetTemperature=2; ColdFullTemperature=-5; ColdRecoverySumDD=20; ColdRecoveryTReference=0; MaintenanceRespirationCoefficient=0.04; GrowthRespirationCoefficient=0.25; RespirationTReference=20; RespirationExponent=1.5; NThresholdsForLeaves=[0.045, 0.02, 0.055]; NThresholdsForStems=[0.0225, 0.01, 0.0275]; NThresholdsForStolons=[0.0225, 0.01, 0.0275]; NThresholdsForRoots=[0.0225, 0.01, 0.0275]; DegreesDayForGermination=125; TargetShootRootRatio=4; MaxRootAllocation=0.25; ShootRootGlfFactor=0.5; UseReproSeasonFactor=0; ReproSeasonReferenceLatitude=41; ReproSeasonTimingCoeff=0.14; ReproSeasonMaxAllocationIncrease=0.5; ReproSeasonAllocationCoeff=0.1; FractionLeafMaximum=0.56; FractionLeafMinimum=0.28; FractionLeafDMThreshold=500; FractionLeafDMFactor=2000; FractionLeafExponent=3; FractionToStolon=0.2; SpecificLeafArea=32; SpecificRootLength=45; StolonEffectOnLAI=0.3; ShootMaxEffectOnLAI=500; MaxStemEffectOnLAI=0.5; LiveLeavesPerTiller=3; TissueTurnoverRateShoot=0.05; TissueTurnoverRateRoot=0.02; DetachmentRateShoot=0.11; TurnoverTemperatureMin=2; TurnoverTemperatureRef=20; TurnoverTemperatureExponent=1; TurnoverDroughtEffectMax=1; TurnoverDroughtThreshold=0.5; TurnoverDefoliationCoefficient=0.5; TurnoverDefoliationRootEffect=0.1; FractionNLuxuryRemobilisable=[0.1, 0.1, 0.1]; MinimumNFixation=0.2; MaximumNFixation=0.6; SoilSaturationEffectMax=0.1; MinimumWaterFreePorosity=-1; SoilSaturationRecoveryFactor=0.25; NDillutionCoefficient=1; GlfGeneric=1; GlfSoilFertility=1; PlantHeightMinimum=300; PlantHeightMaximum=300; PlantHeightMassForMax=7500; PlantHeightExponent=2.5; RootDepthMinimum=30; RootDepthMaximum=350; RootElongationRate=25; RootDistributionDepthParam=70; RootDistributionExponent=2.5; DigestibilitiesCellWall=[0.9, 0.8, 0.7, 0.2]; MinimumGreenWt=50; FractionStolonStanding=0; PreferenceForGreenOverDead=1; PreferenceForLeafOverStems=1; WaterAvailableMethod=0; NitrogenAvailableMethod=0
      Report ReportExample: EventNames=[Clock].EndOfDay
        VariableNames:
          [Clock].Today as Date
          // These examples are set up for Ryegrass and WhiteClover so add in any other species as needed for your simulation
          // The format of AggregationType (variable) from [Report].DayAfterLastOutput to [Clock].Today is used so that when the reporting frequency is changed the outputs are still sensible
          // If the name of the Report component ("ReportExample") here is changed in the simulation tree then all the references to that name in the outputs below also need to be changed
          // If all you want is harvested pasture or net herbage growth and/or standing biomass ....
          Sum of ([AGPRyegrass].HarvestedWt + [AGPWhiteClover].HarvestedWt) from [ReportExample].DayAfterLastOutput to [Clock].Today as HarvestedWt   //the amount harvested (kg DM /ha)
          Sum of ([AGPRyegrass].NetGrowthWt + [AGPWhiteClover].NetGrowthWt) from [ReportExample].DayAfterLastOutput to [Clock].Today as NetGrowthWt   //the amount harvested (kg DM /ha)
          Mean of ([AGPRyegrass].AboveGroundWt + [AGPWhiteClover].AboveGroundWt) from [ReportExample].DayAfterLastOutput to [Clock].Today as StandingBiomass   //pasture biomass (could also be reported as Last rather than Mean) (kg DM /ha)
          // outputs that are used more frequently than others
          Sum of ([AGPRyegrass].WaterDemand + [AGPWhiteClover].WaterDemand) from [ReportExample].DayAfterLastOutput to [Clock].Today as WaterDemand   //how much soil water the pasture could use (mm)
          Sum of (sum([AGPRyegrass].WaterUptake) + Sum([AGPWhiteClover].WaterUptake)) from [ReportExample].DayAfterLastOutput to [Clock].Today as WaterUptake    //the amount of water actuially taken up from the soil (mm)
          Sum of ([AGPRyegrass].SoilDemandN + [AGPWhiteClover].SoilDemandN) from [ReportExample].DayAfterLastOutput to [Clock].Today as NDemand                   //N demand (kg N /ha)
          Sum of ([AGPRyegrass].SoilUptakeN + [AGPWhiteClover].SoilUptakeN) from [ReportExample].DayAfterLastOutput to [Clock].Today as NitrogenUptake       //N uptake from the soil (kg N /ha)
          Sum of ([AGPRyegrass].SoilUptakeN + [AGPWhiteClover].SoilUptakeN) from [ReportExample].DayAfterLastOutput to [Clock].Today as NitrogenUptake       //N uptake from the soil (kg N /ha)
          Sum of [AGPWhiteClover].FixedN from [ReportExample].DayAfterLastOutput to [Clock].Today as NitrogenFixed       //N uptake from the soil (kg N /ha)
          Mean of ([AGPRyegrass].AboveGroundWt + [AGPWhiteClover].AboveGroundWt) from [ReportExample].DayAfterLastOutput to [Clock].Today as HerbageMass
          Mean of ([AGPRyegrass].LAIGreen + [AGPWhiteClover].LAIGreen) from [ReportExample].DayAfterLastOutput to [Clock].Today as LAIGreen
          Mean of ([AGPRyegrass].LAIDead + [AGPWhiteClover].LAIDead + [AGPRyegrass].LAIGreen + [AGPWhiteClover].LAIGreen) from [ReportExample].DayAfterLastOutput to [Clock].Today as LAITotal
          // outputs that indicate what conditions are limiting growth - each growth-limiting factor is 0 (full stress) to 1 (no stress) but there are two components and the values are added so 2 indicates no stress
          Mean of ([AGPRyegrass].GlfTemperature + [AGPWhiteClover].GlfTemperature) from [ReportExample].DayAfterLastOutput to [Clock].Today as GlfTemp       //stress from non-optimal temperature
          Mean of ([AGPRyegrass].GlfWaterSupply + [AGPWhiteClover].GlfWaterSupply) from [ReportExample].DayAfterLastOutput to [Clock].Today as GlfWater       //stress from water limitation
          Mean of ([AGPRyegrass].GlfNSupply + [AGPWhiteClover].GlfNSupply) from [ReportExample].DayAfterLastOutput to [Clock].Today as GlfNitrogen       //stress from N limitation
          // photsynthesis-related outputs - all these are in units of C not DM
          Sum of ([AGPRyegrass].GPP +[AGPWhiteClover].GPP) from [ReportExample].DayAfterLastOutput to [Clock].Today as GrossPrimaryProduction       //GPP (kg C /ha)
          Sum of ([AGPRyegrass].NPP +[AGPWhiteClover].NPP) from [ReportExample].DayAfterLastOutput to [Clock].Today as NettPrimaryProduction        //NPP (kg C /ha)
          // examples of more detailed tissue-based information - see the list of outputs for many more options
          [AGPRyegrass].LeafStage1NConc as RyegrassEmergingLeafNConc
          [AGPRyegrass].LeafStage2NConc as RyegrassDevelopingLeafNConc
          [AGPRyegrass].LeafStage3NConc as RyegrassMatureLeafNConc
          [AGPRyegrass].LeafStage4NConc as RyegrassDeadLeafNConc
      Report: EventNames=[Clock].EndOfDay
        VariableNames:
          [Clock].Today as Date
          // These examples are set up for Ryegrass and WhiteClover so add in any other species as needed for your simulation
          // The format of AggregationType (variable) from [Report].DayAfterLastOutput to [Clock].Today is used so that when the reporting frequency is changed the outputs are still sensible
          // If the name of the Report component ("Report") here is changed in the simulation tree then all the references to that name in the outputs below also need to be changed
          // If all you want is an annual pattern of harvested pasture based on the production year (July to June)  ....
          Sum of ([AGPRyegrass].HarvestedWt + [AGPWhiteClover].HarvestedWt) from 1-Jul to [Clock].Today as HarvestedWt   //the amount harvested (kg DM /ha)
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