Simulations: Version=70
  DataStore
  Memo
    This set of examples has one simulation and three experiments where factorial simulations are presented. Each simulation has examples of managers and report components to tailor the analysis and outputs to user's needs.

    **AgPastureExample**

    This is an example of a simple rotation that is cut/grazed, fertilised and irrigated according to the managers provided.
    >*CutRotation* is the manager used to set the cut/grazing regime. It allows to set up cuts at fixed days interval or according to a target amount of DM and also to set the type of DM being targeted (residual or to be removed - DM produced).

    >*FertiliseFixedDates* gives options to apply fertiliser on determined dates, which can be year specific or not, use soil mineral N to prevent applications over a determined value of N at a certain depth and to provide details about the fertiliser application.

    >*AutomaticIrrigation* allows the user to turn irrigation on or off. Once on, irrigation will occur during a determined period, with a determined amount allocated for the period chosen, and will start and end depending on PAWC values set by the user. The user also has the option to set the minimum amount of days that it takes for an irrigation event to happen again, the maximum amount of water that can be applied at each event and the depth to which PAWC is calculated.

    >*ReportExample and Report* components show options on how to tailor the outputs as it best suits the user needs. More details are given in the components.

    **PastureByWaterAndNitrogen**

    This is an example of a factorial experiment with a simple rotational cut/grazing. The experiment is set as a permutation between the factors Nitrogen, with doses from 0 up to 30 kgN/ha scaled by 5kgN/ha steps, and Water, which allows irrigated and dryland simulations. It has a base simulation that has the same managers from the previous simulation plus a report manager and another option of report component for outputs.

    >*ReportHelper* is a manager that improves the options of dates when outputs are generated. It gives the option to report outputs on particular days that are the same every year, report on absolute dates (that are not the same every year) or to delay the start of reporting (for example, skip the first 2-3 years of the simulation).

    >*ReportAnnual* is a component that shows how the total annual production is outputed.

    **CO2xBaseTemperature**

    This is an example of sensibility analysis to changes in atmospheric CO2 levels and minimum growth temperature (base temperature) via two managers. It is a factorial with the permutation between two CO2 levels (350 and 700 ppm) and five base temperatures (0,2,5,10,15). The *CO2Parameters* and *TemperatureParameters* managers also have the function of providing an example of how to change parameters via a manager script. A list of public parameters is provided in the [science documentation of AgPasture](http://apsimdev.apsim.info/Portals/0/Documentation/ApsimX/AgPastureScience.pdf).

    >*CO2Parameters* manager allows to change the atmospheric CO2 value. When not specified, APSIM will use the default value of 350 ppm. This manager also provides the option of changing the default values of parameters that are used to calculate the effect of CO2 on photosynthesis. These parameters are species specific and should be changed if the user wants to test the sensibility to these parameters or has detailed information on these parameters for a certain species/cultivar. Note that this manager is species specific, except for the atmospheric level of CO2. Therefore, if the parameters need to be changed for another species at the same time (for example pasture mixes), the user will need one manager for each species.

    >*TemperatureParameters* manager allows to change parameters that affect the plant photosynthesis response to temperature. Again, this is useful to test the sensibility to the parameters and to introduce more detailed information about a certain species/cultivar. This manager is species speficic and, therefore, a manager per species is needed.

    **CO2xHeatOnset**
    This is an example of sensibility analysis to changes in atmospheric CO2 levels and the 'HeatOnsetTemperature' parameter similar to the *CO2xBaseTemperature* simulation. The 'HeatOnsetTemperature' is the onset temperature for heat effects on photosynthesis. This simulation presents a different way of changing parameters directly via the factor component (instead of introducing a manager). In this case, a different factor component would be needed to change the parameter for another species, when necessary in mixed species simulations.
  Simulation AgPastureExample
    Clock: Start=1980-07-01; End=1985-06-30
    Weather: FileName=%root%\Examples\WeatherFiles\lincoln.met
    SoilArbitrator
    Summary
    Zone Field: Area=1; Slope=0; AspectAngle=0; Altitude=50
      Manager CutRotation
        AllowControl = yes
        CutRotationStartDate = 01/01/1900 00:00:00
        CutRotationEndDate = 12/31/2100 00:00:00
        IntervalType = FixedInterval
        CutInterval = 21
        DurationOfCut = 1
        RemoveAmountType = ResidualDM
        AmountGiven = 1000
        DMRemoveType = BasedOnDigestibility
        FractionN2Remove = 0.75
        ReturnType = AsDungUrine
        NDungType = DefineProportion
        ProportionN2Dung = 0.4
        CNRatioDung = 0
        UrineDepth = 250
```csharp
// Defoliates AgPasture on a regular rotation or one-off via a schedule
// currenty defoliates the amount specified by spreading evenly over the specified period

using System;
using System.Collections.Generic;
using System.Xml.Serialization;
using Models.Core;
using Models.PMF;
using Models.Soils;
using APSIM.Shared.Utilities;
using Models.Interfaces;

namespace Models
{
    [Serializable]
    public class Script : Model
    {
        // - Links to APSIM models
        [Link] Zone myZone;
        [Link] Clock Clock;
        [Link] Fertiliser fertiliser;
        [Link(ByName = true)] ISolute no3;
        [Link] Soil mySoil;
        [Link] ISummary summary = null;
        
        List<AgPasture.PastureSpecies> Pasture = new List<AgPasture.PastureSpecies>();
        
        // - Paramters for this manager
        [Description("Allow this manager to control defoliation? ")]
        public yesnoType AllowControl { get; set; }
        [Description("Date to begin the rotation: ")]
        public DateTime CutRotationStartDate { get; set; }
        [Description("Date to finish the rotation: ")]
        public DateTime CutRotationEndDate { get; set; }
        [Description("How the interval is defined: ")]
        public rotationIntervalTypes IntervalType { get; set; }
        [Description("Rotation interval (days): ")]
        public int CutInterval { get; set; }
        [Description("Duration of each event (days): ")]
        public int DurationOfCut { get; set; }
        [Description("What amount is being defined: ")]
        public removeAmountTypes RemoveAmountType { get; set; }
        [Description("Amount to use (kg/ha): ")]
        public double AmountGiven { get; set; }
        [Description("How much of DM is removed from the field: ")]
        public removeDMTypes DMRemoveType { get; set; }
        [Description("Fraction of N that is removed from the field (0-1): ")]
        public double FractionN2Remove { get; set; }
        [Description("How defoliated material is returned to the field? ")]
        public returnTypes ReturnType { get; set; }
        [Description("How the partition of N to dung and urine are defined:")]
        public dungNContentTypes NDungType { get; set; }
        [Description("Proportion of returned N that goes to dung (0-1): ")]
        public double ProportionN2Dung { get; set; }
        [Description("The C:N of dung (typically around 20): ")]
        public double CNRatioDung { get; set; }
        [Description("Depth down to which urine is applied (mm): ")]
        public double UrineDepth { get; set; }

        // - Outputs from this manager
        [XmlIgnore][Units("g/m2")]// Description: Pasture DM defoliated today
        public double DefoliatedWt { get; set; }
        [XmlIgnore][Units("g/m2")]// Description: Pasture N defoliate today
        public double DefoliatedN { get; set; }
        [XmlIgnore][Units("g/m2")]// Description: Pasture DM harvested today
        public double HarvestedWt { get; set; }
        [XmlIgnore][Units("g/m2")]// Description: Pasture N harvested today
        public double HarvestedN { get; set; }
        [XmlIgnore][Units("g/m2")]// Description: Pasture DM removed from the field
        public double RemovedWt { get; set; }
        [XmlIgnore][Units("g/m2")]// Description: Pasture N removed from the field
        public double RemovedN { get; set; }
        [XmlIgnore][Units("g/m2")]// Description: Residue DM returned to the field
        public double ReturnedWt { get; set; }
        [XmlIgnore][Units("g/m2")]// Description: Residue N returned to the field
        public double ReturnedN { get; set; }
        [XmlIgnore][Units("g/m2")]// Description: Harvested N returned as dung (SurfaceOM)
        public double NReturnedInDung { get; set; }
        [XmlIgnore][Units("g/m2")]// Description: Harvested N returned as urine (urea)
        public double NReturnedInUrine { get; set; }
        [XmlIgnore][Units("day")]// Description: Number of days after last defoliation
        public int DaysAfterCut { get; set; }
        [XmlIgnore][Units("g/m2")]// Description: Total standing DM (Leaf + Stem/Sheath) before cut
        public double PreHarvestDM { get; set; }
        [XmlIgnore][Units("g/m2")]// Description: Total standing DM (Leaf + Stem/Sheath) after cut
        public double PostHarvestDM { get; set; }
        
        // - Internal variables
        // fraction of harvested Dm to actually remove from field
        private double fractionDM2Remove = 1.0;
        // number of days for each defoliation event
        private int cuttingDuration = 0;
        // counter for day within each defoliation
        private int daysCutting = 0;
        // total existing DM harvestable
        private double existingDM;
        // total herbage to remove in g/m2 per day
        private double herbageToRemove;
        // type of DM amount (ResidualDM or DMToRemove)
        private string amountType;
        // auxiliary flag for defoliation
        private bool aCutHasHappened = false;
        // fraction of urine that is applied to each layer
        private double[] fractionUrine;
        // number of layer in the soil
        private int nLayers;

        // - Event to add residue or dung to surface OM
        public event BiomassRemovedDelegate BiomassRemoved;

        [EventSubscribe("Commencing")]
        private void OnSimulationCommencing(object sender, EventArgs e)
        {
            foreach (AgPasture.PastureSpecies species in Apsim.Children(myZone, typeof(AgPasture.PastureSpecies)))
                Pasture.Add(species);

            // reset variables
            DaysAfterCut = 0;
            resetVariables();
            cuttingDuration = DurationOfCut;
            
            // get the type of amount given
            if (RemoveAmountType == removeAmountTypes.ResidualDM)
                amountType = "SetResidueAmount";
            else
                amountType = "SetRemoveAmount";

            // make sure that rotation start when startDate < simulationStartDay
            if ((Clock.Today > CutRotationStartDate) && (Clock.Today < CutRotationEndDate))
                CutRotationStartDate = Clock.Today;
                
            // set the fraction of urine for each layer
            nLayers = mySoil.Thickness.Length;
            fractionUrine = new double[nLayers];
            double soilDepth = 0.0;
            double distFactor = 1.5;
            if (ReturnType == returnTypes.AsDungUrine)
            {
                double atZ0;
                double atZ1;
                double totalProp = UrineDepth * Math.Pow(1.0, distFactor) / (distFactor + 1.0);
                
                atZ1 = (UrineDepth - soilDepth) * Math.Pow(1.0 - soilDepth / UrineDepth, distFactor) / (distFactor + 1.0);
                for (int z = 0; z < nLayers; z++)
                {
                    atZ0 = atZ1;
                    soilDepth += mySoil.Thickness[z];
                    atZ1 = (UrineDepth - soilDepth) * Math.Pow(1.0 - soilDepth / UrineDepth, distFactor) / (distFactor + 1);
                    if (1.0 - (soilDepth / UrineDepth) < 0.0)
                        atZ1 = 0;
                    fractionUrine[z] = (atZ0 - atZ1) / totalProp;
                }
            }
        }
        
        [EventSubscribe("DoManagement")]
        private void OnDoManagement(object sender, EventArgs e)
        {
            // Check whether defoliation is allowed at all
            if (AllowControl == yesnoType.yes)
            {
                // Check whether defoliation can start
                if ((Clock.Today >= CutRotationStartDate) && (Clock.Today <= CutRotationEndDate))
                {
                    if (Clock.Today == CutRotationStartDate)
                        DaysAfterCut = CutInterval;
    
                    // Check whether we should start a defoliation
                    if ((Pasture[0].IsAlive) && (DaysAfterCut >= (CutInterval - 1)))
                        StartDefoliation(AmountGiven, amountType, DurationOfCut);
                }
            }
            //// Note: Only the code above should be limited by 'AllowControl'. So the rest of the code
            ////  can be used by being called from another manager or a schedulle thingy


            // Check whether we need to continue cutting
            if ((daysCutting > 0) && (daysCutting < cuttingDuration))
            {
                // reset outputs
                resetVariables();

                defoliatePasture(herbageToRemove);
                if (ReturnType == returnTypes.AsResidue)
                    returnResidues();
                else
                    returnExcreta();
                daysCutting += 1;
                if (daysCutting == cuttingDuration)
                {
                    PostHarvestDM = 0.0;
                    foreach (AgPasture.PastureSpecies species in Pasture)
                        PostHarvestDM += species.StandingHerbageWt;
                }
            }

            // reset outputs
            if (daysCutting < 0)
            {
                resetVariables();
                daysCutting = 0;
            }
        }

        [EventSubscribe("DoManagementCalculations")]
        private void OnDoManagementCalculations(object sender, EventArgs e)
        {
            // Check whether a cutting has finished
            if (daysCutting == cuttingDuration)
            {
                aCutHasHappened = true;
                daysCutting = -1;
            }

            // Increase the counter for days after cutting
            if (aCutHasHappened && (daysCutting == 0))
                DaysAfterCut += 1;
        }

        // Resets the values of all outputs
        private void resetVariables()
        {
            DefoliatedWt = 0.0;
            DefoliatedN = 0.0;
            HarvestedWt = 0.0;
            HarvestedN = 0.0;
            RemovedWt = 0.0;
            RemovedN = 0.0;
            ReturnedWt = 0.0;
            ReturnedN = 0.0;
            NReturnedInDung = 0.0;
            NReturnedInUrine = 0.0;
        }

        // Description: Perform the basic calculations for defoliation
        public void StartDefoliation(double amountDM, string amountType, int duration)
        {
            // Get the existing plant amount
            existingDM = 0.0;
            PreHarvestDM = 0.0;
            foreach (AgPasture.PastureSpecies species in Pasture)
            {
                PreHarvestDM += species.StandingHerbageWt;
                existingDM += species.HarvestableWt;
            }
            
            // Check the amount to remove and print some info
            if ((amountType == "SetRemoveAmount") && (existingDM >= amountDM / duration))
            {
                summary.WriteMessage(this, "   Defoliating " + (10 * amountDM).ToString("#0.0") + "kg/ha over " + duration + " days");
                herbageToRemove = amountDM / duration;
            }
            else if ((amountType == "SetResidueAmount") && (existingDM >= amountDM))
            {
                summary.WriteMessage(this, "   Defoliating down to approximately " + (10 * amountDM).ToString("#0.0") + "kg/ha over " + duration + " days");
                herbageToRemove = (PreHarvestDM - amountDM) / duration;
            }
            else
            {
                summary.WriteMessage(this, "   Defoliation will not happend because there is not enough plant material");
                if (IntervalType == rotationIntervalTypes.FixedInterval)
                    DaysAfterCut = -duration;
                return;
            }

            // Start defoliation
            cuttingDuration = duration;
            defoliatePasture(herbageToRemove);
            if (ReturnType == returnTypes.AsResidue)
                returnResidues();
            else
                returnExcreta();
                
            daysCutting = 1;
            DaysAfterCut = 0;
            if (daysCutting == cuttingDuration)
            {
                PostHarvestDM = 0.0;
                foreach (AgPasture.PastureSpecies species in Pasture)
                    PostHarvestDM += species.StandingHerbageWt;
            }
        }

        // Do the DM removal
        private void defoliatePasture(double removeAmount)
        {
            // Remove a proportion of required DM from each species
            DefoliatedWt = 0.0;
            DefoliatedN = 0.0;
            foreach (AgPasture.PastureSpecies species in Pasture)
            {
                double amountToRemove = removeAmount * species.HarvestableWt / existingDM;
                species.Graze(amount: amountToRemove, type: "SetRemoveAmount");
                DefoliatedWt += species.HarvestedWt;
                DefoliatedN += species.HarvestedN;
            }
            
            // total harvested is equal total defoliated, for now
            HarvestedWt = DefoliatedWt;
            HarvestedN = DefoliatedN;

            // get amounts actually removed from field and that to be returned (dung/urine)
            if (DMRemoveType == removeDMTypes.RemoveAll)
                fractionDM2Remove = 1.0;
            else if (DMRemoveType == removeDMTypes.RemoveNone)
                fractionDM2Remove = 0.0;
            else
            {
                fractionDM2Remove = 0.0;
                foreach (AgPasture.PastureSpecies species in Pasture)
                    fractionDM2Remove += species.HarvestedDigestibility * species.HarvestedWt;
                fractionDM2Remove /= removeAmount;
            }
            
            RemovedWt = HarvestedWt * fractionDM2Remove;
            RemovedN = HarvestedN * FractionN2Remove;
            ReturnedWt = HarvestedWt - RemovedWt;
            ReturnedN = HarvestedN - RemovedN;

            if (ReturnType == returnTypes.AsDungUrine)
            {
                if (NDungType == dungNContentTypes.DefineProportion)
                    NReturnedInDung = ReturnedN * ProportionN2Dung;
                else
                    NReturnedInDung = Math.Min(ReturnedN, ReturnedWt * 0.4 / CNRatioDung);
                NReturnedInUrine = ReturnedN - NReturnedInDung;
            }
            else
            {
                NReturnedInDung = 0.0;
                NReturnedInUrine = 0.0;
            }
        }
        
        // Return dung and urine
        private void returnExcreta()
        {
            if ((ReturnedWt > 0.0) || (NReturnedInDung > 0.0))
            {
                PMF.BiomassRemovedType BiomassDung = new PMF.BiomassRemovedType();
                string[] type = new string[] { "RuminantDung_PastureFed" };
                float[] dltdm = new float[] { (Single)ReturnedWt };
                float[] dltn = new float[] { (Single)NReturnedInDung };
                float[] dltp = new float[] { 0 };
                float[] fraction = new float[] { 1 };     // fraction is always 1.0 here

                BiomassDung.crop_type = "RuminantDung_PastureFed";
                BiomassDung.dm_type = type;
                BiomassDung.dlt_crop_dm = dltdm;
                BiomassDung.dlt_dm_n = dltn;
                BiomassDung.dlt_dm_p = dltp;
                BiomassDung.fraction_to_residue = fraction;
                BiomassRemoved.Invoke(BiomassDung);
            }

            if (NReturnedInUrine > 0.0)
            {
                double[] myUrineDeposition = new double[nLayers];
                for (int z = 0; z < nLayers; z++)
                    myUrineDeposition[z] = NReturnedInUrine * fractionUrine[z];

                no3.AddKgHaDelta(SoluteSetterType.Fertiliser, myUrineDeposition);
                //fertiliser.Apply(NReturnedInUrine * 10, Fertiliser.Types.UreaN, 1.0);
            }
        }

        // Return pasture residues
        private void returnResidues()
        {
            if ((ReturnedWt > 0.0) || (ReturnedN > 0.0))
            {
                PMF.BiomassRemovedType BiomassDung = new PMF.BiomassRemovedType();
                string[] type = new string[] { "Grass" };
                float[] dltdm = new float[] { (Single)ReturnedWt };
                float[] dltn = new float[] { (Single)ReturnedN };
                float[] dltp = new float[] { 0 };
                float[] fraction = new float[] { 1 };     // fraction is always 1.0 here

                BiomassDung.crop_type = "Grass";
                BiomassDung.dm_type = type;
                BiomassDung.dlt_crop_dm = dltdm;
                BiomassDung.dlt_dm_n = dltn;
                BiomassDung.dlt_dm_p = dltp;
                BiomassDung.fraction_to_residue = fraction;
                BiomassRemoved.Invoke(BiomassDung);
            }
        }
        
        // Auxiliary bits and pieces  - - - - - - - - - - - - - - - - - - - - - - - -  - - - - -  - -

        public enum yesnoType
        {
            /// <summary>a positive answer</summary>
            yes,
            /// <summary>a negative answer</summary>
            no
        }

        public enum removeAmountTypes
        {
            /// <summary>Setting DM amount to remove</summary>
            DMToRemove,
            /// <summary>Setting residual DM amount</summary>
            ResidualDM
        }

        public enum rotationIntervalTypes
        {
            /// <summary>Setting a fixed interval</summary>
            FixedInterval,
            /// <summary>Setting a target (minimum) inteval</summary>
            TargetInterval
        }

        public enum removeDMTypes
        {
            /// <summary>Remove all DM</summary>
            RemoveAll,
            /// <summary>Remove no DM</summary>
            RemoveNone,
            /// <summary>Remove a fraction based on digestibility</summary>
            BasedOnDigestibility
        }
        
        public enum returnTypes
        {
            /// <summary>Return plant material as residue</summary>
            AsResidue,
            /// <summary>Return meterial as dung and urine</summary>
            AsDungUrine
        }

        public enum dungNContentTypes
        {
            /// <summary>Define the proportion of N returned as dung</summary>
            DefineProportion,
            /// <summary>Define the C:N of dung</summary>
            DefineCNratio,
        }
    }
}
```
      Manager FertiliseFixedDates
        Amount = 15
        EachYear = True
        Dates = 5-jan,5-feb,5-mar,5-apr,5-aug,5-sep,5-oct,5-nov,5-dec
        UseCritNThreshold = False
        CritNThreshold = 50
        CritNDepth = 75
        Depth = 50
        FertiliserType = UreaN
```csharp
using System;
using Models.Core;
using Models.Soils;
using Models.Soils.Nutrients;
using Models.PMF;
using APSIM.Shared.Utilities;
using System.Linq;

namespace Models
{
    [Serializable]
    public class Script : Model
    {
        [Link] Clock clock;
        [Link] Fertiliser fertiliser;
        [Link] ISummary summary;
        [Link] Soil soil;

        private Nutrient nutrient;
        private SoilNitrogen soilN;

        [Separator("Fertiliser will be applied on the date(s) below")]
        [Description("Apply fertiliser on the same day(s) each year? If no, then must include the year of appliaction below")]
        public bool EachYear { get; set; }

        [Description("Dates for one or more fertiliser applications (dd-mmm or dd-mmm-yyyy) as a list with a comma between dates")]
        public string[] Dates { get; set; }

        [Separator("Test for the mineral N in the soil and don't apply the fertiliser if greater than X kgN/ha is stored in the soil above a depth of Y mm")]
        [Description("Use a critical soil mineral N to prevent application above a threshold?")]
        public bool UseCritNThreshold { get; set; }

        [Description("Don't add fertiliser if N in the soil to the depth below exceeds (kg/ha)")]
        public double CritNThreshold { get; set; }

        [Description("Depth to which the amount of N in the soil should be calculated (mm)")]
        public double CritNDepth { get; set; }

        [Separator("Fertiliser application details")]
        [Description("Depth at which to apply the fertiliser (mm)")]
        public double Depth { get; set; }

        [Description("Amount of fertiliser to apply (kg N /ha) per application")]
        public double Amount { get; set; }

        [Description("Fertiliser type - select from the list")]
        public Fertiliser.Types FertiliserType { get; set; }


        [EventSubscribe("StartOfSimulation")]
        private void FindSoilNOrNutrient(object sender, EventArgs e)
        {
            nutrient = Apsim.Find(this, typeof(Nutrient)) as Nutrient;
            soilN = Apsim.Find(this, typeof(SoilNitrogen)) as SoilNitrogen;

            if (nutrient == null && soilN == null)
                throw new Exception(string.Format("Error in script {0}: Unable to find nutrient or soilN.", Name));
        }

        [EventSubscribe("DoManagement")]
        private void OnDoManagement(object sender, EventArgs e)
        {
            if (OnApplicationDate())
            {
                if (NContentBelowThreshold())
                    fertiliser.Apply(Amount, FertiliserType, Depth);
                else
                    summary.WriteMessage(this, "Skipping fertiliser application due to soil mineral N content being above critical threshold.");
            }
        }

        /// <summary>Checks if today's date is one of the specified fertiliser application dates.</summary>
        private bool OnApplicationDate()
        {
            if (EachYear)
                return Dates.Any(d => DateUtilities.DatesEqual(d, clock.Today));
            
            DateTime[] dates = Dates.Select(d => DateTime.ParseExact(d, "d-MMM-yyyy", null)).ToArray();
            return dates.Any(d => SameDate(d, clock.Today));
        }

        /// <summary>Checks if N content in soil is below critical threshold.</summary>
        private bool NContentBelowThreshold()
        {
            if (!UseCritNThreshold)
                return true;
            
            double[] weights = GetLayerWeights();
            double cumSoilN = 0;

            for (int i = 0; i < soil.Thickness.Length; i++)
            {
                if (nutrient != null)
                    cumSoilN += weights[i] * nutrient.MineralN[i];
                else if (soilN != null)
                    cumSoilN += weights[i] * soilN.mineral_n[i];
            }

            return cumSoilN <= CritNThreshold;
        }

        private double[] GetLayerWeights()
        {
            double[] weights = new double[soil.Thickness.Length];
            double cumDepth = 0;

            for (int i = 0; i < soil.Thickness.Length; i++)
            {
                cumDepth += soil.Thickness[i];
                if (cumDepth < CritNDepth)
                    weights[i] = 1;
                else if (cumDepth - soil.Thickness[i] <= CritNDepth)
                    weights[i] = (CritNDepth - (cumDepth - soil.Thickness[i])) / soil.Thickness[i];
                else
                    weights[i] = 0;
            }

            return weights;
        }

        private bool SameDate(DateTime d1, DateTime d2)
        {
            return d1.Year == d2.Year && d1.DayOfYear == d2.DayOfYear;
        }
    }
}
```
      Manager AutomaticIrrigation
        allowIrrigation = True
        seasonStart = 1-sep
        seasonEnd = 30-apr
        seasonsAllocation = 10000
        triggerDeficit = 75
        targetDeficit = 95
        returndays = 3
        maximumAmount = 30
        depthPAWC = 300
```csharp
using System;
using Models.Core;
using Models.PMF;
using Models.Soils;
using System.Xml.Serialization;
using Models.PMF;
using APSIM.Shared.Utilities;


        
namespace Models
{
    [Serializable] 
    [System.Xml.Serialization.XmlInclude(typeof(Model))]
    public class Script : Model
    {
        //Communication to other modules
        [Link] ISummary summary = null;
        [Link] Irrigation Irrigation;
        [Link] Clock Clock;
        [Link] Soil Soil;
        [Link(IsOptional = true)] IPlant existingCrop;
       
        //User inputs from properties tab
        [Description("Turn irrigation on?")]
        public bool allowIrrigation { get; set; }
        [Description("Start of irrigation season (dd-MMM)")]
        public string seasonStart { get; set; }
        [Description("End of irrigation season (dd-MMM)")]
        public string seasonEnd { get; set; }
        [Description("Season allocation (mm)")]
        public double seasonsAllocation { get; set; }
        [Description("Deficit to trigger irrigation (% PAWC)")]
        public double triggerDeficit { get; set; }
        [Description("Deficit to stop irrigaton (% PAWC)")]
        public double targetDeficit { get; set; }
        [Description("Minimum days for irrigation to return")]
        public double returndays { get; set; }
        [Description("Maximum irrigation application (mm/day)")]
        public double maximumAmount { get; set; }
        [Description("Depth to calculate PAWC (mm)")]
        public double depthPAWC { get; set; }

        //Class members
        [XmlIgnore] public double TopSWdeficit { get; set; }
        [XmlIgnore] public double TopSWC { get; set; }
        [XmlIgnore] public double DaysSinceIrrigation { get; set; }
        [XmlIgnore] public double AmountToApply { get; set; }
        [XmlIgnore] public double SeasonAppliedAmount { get; set; }
        
        private bool IrrigationIsAllowed { get; set; }
        private bool SeasonIsOpen { get; set; }
        private bool CropIsActive { get; set; }
        private bool IrrigatorIsAvailable { get; set; }
        private bool SoilIsDry { get; set; }

        private DateTime StartDate;
        private DateTime EndDate;
        private double TopDUL;
        private double TopLL;
        private int nLayers;
    
        //Calculate static soil variables
        [EventSubscribe("StartOfSimulation")]
        private void OnStartOfSimulation(object sender, EventArgs e)
        {   
            //Set the season dates
            StartDate = DateTime.Parse(seasonStart + "-" + Clock.Today.Year.ToString());
            EndDate = DateTime.Parse(seasonEnd + "-" + Clock.Today.Year.ToString());
            
            //Can we irrigate at all?
            IrrigationIsAllowed = false; 
            if (allowIrrigation)
                IrrigationIsAllowed = true; 

            //Calculate soil water variables
            double depthFromSurface = 0.0;
            double fracLayer = 0.0;
            nLayers = Soil.Thickness.Length;
            for (int layer = 0; layer < nLayers; layer++)
            {
                fracLayer = Math.Min(1.0, (depthPAWC - depthFromSurface) / Soil.Thickness[layer]);
                TopLL += Soil.LL15mm[layer] * fracLayer;
                TopDUL += Soil.DULmm[layer] * fracLayer;
                depthFromSurface += Soil.Thickness[layer];
                if (depthFromSurface >= depthPAWC)
                    layer = nLayers;
            }
        }
             
        //Determine daily requirement for irrigation
        [EventSubscribe("StartOfDay")]
        private void OnStartOfDay(object sender, EventArgs e)
        {
            //Can we irrigate today?          
            SeasonIsOpen = isBetween(Clock.Today, StartDate, EndDate);

            //Is there a crop in the ground that needs irrigation?
            CropIsActive = false;
            if ((existingCrop != null) && (existingCrop.IsAlive))
                CropIsActive = true;
            //if ((existingCrop.Phenology.Stage >= 3.0) && (existingCrop.Phenology.Stage < 6.0))
          
            //Is the irrigator available?
            IrrigatorIsAvailable = false;
            DaysSinceIrrigation += 1;
            if (DaysSinceIrrigation >= returndays)
                IrrigatorIsAvailable = true;
          
            //Is the soil dry enough to require irrigation?
            SoilIsDry = false;
            double depthFromSurface = 0.0;
            double fracLayer = 0.0;
            TopSWC = 0.0;
            for (int layer = 0; layer < nLayers; layer++)
            //for (int layer = 0; depthFromSurface < depthPAWC + Soil.Thickness[layer]; layer++)
            {
                fracLayer = Math.Min(1.0, (depthPAWC - depthFromSurface) / Soil.Thickness[layer]);
                TopSWC += Soil.SoilWater.SWmm[layer] * fracLayer;
                depthFromSurface += Soil.Thickness[layer];
                if (depthFromSurface >= depthPAWC)
                    layer = nLayers;
            }
            
            TopSWdeficit = TopSWC - TopDUL;
            if (Math.Max(0.0, -TopSWdeficit) >= (TopDUL - TopLL) * (100 - triggerDeficit) / 100)
                SoilIsDry = true;
                
            //Are all the conditions ratifying irrigation
            if (IrrigationIsAllowed && SeasonIsOpen && CropIsActive && IrrigatorIsAvailable && SoilIsDry)
            {
                //Lets bloody well irrigate then!!!!
                AmountToApply = TopDUL * targetDeficit / 100 - TopSWC;
                AmountToApply = Math.Max(0.0, Math.Min(AmountToApply, seasonsAllocation - SeasonAppliedAmount));
                Irrigation.Apply(AmountToApply);
                DaysSinceIrrigation = 0;
                SeasonAppliedAmount += AmountToApply;
            }
        }
        
        ///Checks whether theDate is between iniDate and endDate (non-year specific)
        private bool isBetween(DateTime theDay, DateTime iniDate, DateTime endDate)
        {
            bool result = false;
            if (iniDate.DayOfYear < endDate.DayOfYear)
            {
                // period is within one year, ex: summer in the northern hemisphere
                if ((theDay.DayOfYear >= iniDate.DayOfYear) && (theDay.DayOfYear <= endDate.DayOfYear))
                    result = true;
            }
            else
            {
                // period goes over the end of the year, ex: summer in the southern hemisphere
                if ((theDay.DayOfYear >= iniDate.DayOfYear) || (theDay.DayOfYear <= endDate.DayOfYear))
                    result = true;
            }
            
            return result;
        }
    }
}
```
      MicroClimate: a_interception=0; b_interception=1; c_interception=0; d_interception=0; soil_albedo=0.23; SoilHeatFluxFraction=0.4; NightInterceptionFraction=0.5; ReferenceHeight=2
      Irrigation
      Fertiliser
      SurfaceOrganicMatter: InitialResidueName=Sward; InitialResidueType=grass; InitialResidueMass=1000; InitialStandingFraction=0; InitialCPR=0; InitialCNR=15; FractionFaecesAdded=0.5
      Soil: SoilType=NZ_Sedimentary; LocalName=Lismore; Site=Winchmore; NearestTown=Ashburton; Region=Canterbury; Country=New Zealand; Latitude=-48.48; Longitude=0
        Chemical
          Thickness  NO3N  NH4N  PH
          150        5     0.1   6
          150        2.5   0.1   6
          200        1     0.1   6
          150        0.75  0.1   6
          250        0.5   0.1   6
          300        0.5   0.1   6
          300        0.5   0.1   6
        Physical
          Thickness  ParticleSizeClay  BD    AirDry  LL15   DUL    SAT   KS
          150        20                1.3   0.05    0.15   0.36   0.45  5000
          150        15                1.35  0.12    0.14   0.34   0.43  2500
          200        12                1     0.055   0.055  0.19   0.25  3000
          150        8                 0.53  0.015   0.015  0.065  0.15  10000
          250        6                 0.31  0.01    0.01   0.04   0.11  17500
          300        5                 0.3   0.01    0.01   0.03   0.11  20000
          300        5                 0.3   0.01    0.01   0.03   0.11  20000
          SoilCrop AGPRyegrassSoil: LL=[0.15, 0.14, 0.06, 0.02, 0.01, 0.01, 0.01]; KL=[0.1, 0.1, 0.08, 0.04, 0.01, 0, 0]; XF=[1, 1, 1, 1, 1, 0, 0]
          SoilCrop AGPWhiteCloverSoil: LL=[0.15, 0.14, 0.06, 0.02, 0.01, 0.01, 0.01]; KL=[0.1, 0.1, 0.08, 0.04, 0.01, 0, 0]; XF=[1, 1, 1, 1, 1, 0, 0]
        SoilWater: SummerDate=1-Nov; SummerU=6; SummerCona=3.5; WinterDate=1-apr; WinterU=2; WinterCona=2; DiffusConst=88; DiffusSlope=35; Salb=0.13; CN2Bare=73; CNRed=20; CNCov=0.8; slope=0; discharge_width=0; catchment_area=0; max_pond=0; PrecipitationInterception=0
          Thickness  SWCON  KLAT
          150        0.5    0
          150        0.52   0
          200        0.55   0
          150        0.6    0
          250        0.65   0
          300        0.65   0
          300        0.65   0
        SoilNitrogen: fom_types=[default, manure, mucuna, lablab, shemp, stable]; fract_carb=[0.2, 0.3, 0.54, 0.57, 0.45, 0]; fract_cell=[0.7, 0.3, 0.37, 0.37, 0.47, 0.1]; fract_lign=[0.1, 0.4, 0.09, 0.06, 0.08, 0.9]
          SoilNitrogenNO3 NO3
          SoilNitrogenNH4 NH4
          SoilNitrogenUrea Urea
          SoilNitrogenPlantAvailableNO3 PlantAvailableNO3
          SoilNitrogenPlantAvailableNH4 PlantAvailableNH4
        Organic: FOMCNRatio=40
          Thickness  Carbon  SoilCNRatio  FBiom  FInert  FOM
          150        3       12           0.04   0.5     331.337
          150        1       12           0.02   0.7     245.461
          200        0.6     12           0.02   0.83    164.537
          150        0.4     12           0.01   0.9     121.892
          250        0.25    12           0.01   0.95    73.9313
          300        0.15    12           0      0.99    40.5743
          300        0.1     12           0      0.99    22.2677
        InitialWater Initial water: PercentMethod=1; FractionFull=0.95
        Sample Initial nitrogen: Thickness=[150, 150, 200, 150, 250, 300, 300]; SWUnits=Volumetric; OCUnits=Total; PHUnits=Water
        CERESSoilTemperature
      PastureSpecies AGPRyegrass: Albedo=0.26; Gsmax=0.011; R50=200; InitialShootDM=1500; InitialRootDM=450; InitialRootDepth=750; initialDMFractionsGrasses=[0.15, 0.25, 0.25, 0.05, 0.05, 0.1, 0.1, 0.05, 0, 0, 0]; initialDMFractionsForbs=[0.2, 0.2, 0.15, 0.05, 0.1, 0.15, 0.1, 0.05, 0, 0, 0]; ReferencePhotosyntheticRate=1; LightExtinctionCoefficient=0.5; GrowthTminimum=1; GrowthToptimum=20; GrowthTEffectExponent=1.7; HeatOnsetTemperature=28; HeatFullTemperature=35; HeatRecoverySumDD=30; HeatRecoveryTReference=25; ColdOnsetTemperature=1; ColdFullTemperature=-5; ColdRecoverySumDD=25; MaintenanceRespirationCoefficient=0.03; GrowthRespirationCoefficient=0.25; RespirationTReference=20; NThresholdsForLeaves=[0.04, 0.012, 0.05]; NThresholdsForStems=[0.02, 0.006, 0.025]; NThresholdsForStolons=[0, 0, 0]; NThresholdsForRoots=[0.02, 0.006, 0.025]; DegreesDayForGermination=125; TargetShootRootRatio=4; MaxRootAllocation=0.25; ShootRootGlfFactor=0.5; ReproSeasonReferenceLatitude=41; ReproSeasonTimingCoeff=0.14; ReproSeasonMaxAllocationIncrease=0.5; ReproSeasonAllocationCoeff=0.1; FractionLeafMaximum=0.7; FractionLeafMinimum=0.7; FractionLeafDMThreshold=500; FractionLeafDMFactor=2000; FractionLeafExponent=3; SpecificLeafArea=20; SpecificRootLength=100; ShootMaxEffectOnLAI=1000; MaxStemEffectOnLAI=1; LiveLeavesPerTiller=3; TissueTurnoverRateShoot=0.05; TissueTurnoverRateRoot=0.02; DetachmentRateShoot=0.08; TurnoverTemperatureMin=2; TurnoverTemperatureRef=20; TurnoverTemperatureExponent=1; TurnoverDroughtEffectMax=1; TurnoverDroughtThreshold=0.5; TurnoverDefoliationCoefficient=0.5; TurnoverDefoliationRootEffect=0.1; FractionNLuxuryRemobilisable=[0.1, 0.1, 0.1]; SoilSaturationEffectMax=0.1; MinimumWaterFreePorosity=-1; SoilSaturationRecoveryFactor=0.25; NDillutionCoefficient=0.25; GlfGeneric=1; GlfSoilFertility=1; PlantHeightMinimum=300; PlantHeightMaximum=300; PlantHeightMassForMax=10000; PlantHeightExponent=2.8; RootDepthMinimum=50; RootDepthMaximum=1000; RootElongationRate=25; RootDistributionDepthParam=250; RootDistributionExponent=3.2; RootBottomDistributionFactor=1.05; DigestibilitiesCellWall=[0.9, 0.7, 0.6, 0.2]; MinimumGreenWt=100; PreferenceForGreenOverDead=1; PreferenceForLeafOverStems=1; MaximumNUptake=10
        zero: LAI, SpeciesFamily, PhotosyntheticPathway, UseHeatStressFactor, UseColdStressFactor, ColdRecoveryTReference, UseReproSeasonFactor, FractionToStolon, StolonEffectOnLAI, MinimumNFixation, MaximumNFixation, SymbiontCostFactor, NFixingCostFactor, FractionStolonStanding, WaterAvailableMethod, NitrogenAvailableMethod, LAIGreen
        initialDMFractionsLegumes=[0.16, 0.23, 0.22, 0.05, 0.03, 0.05, 0.05, 0.01, 0.04, 0.08, 0.08]
      PastureSpecies AGPWhiteClover: Albedo=0.26; Gsmax=0.011; R50=200; SpeciesFamily=1; InitialShootDM=500; InitialRootDM=150; InitialRootDepth=350; initialDMFractionsGrasses=[0.15, 0.25, 0.25, 0.05, 0.05, 0.1, 0.1, 0.05, 0, 0, 0]; initialDMFractionsForbs=[0.2, 0.2, 0.15, 0.05, 0.1, 0.15, 0.1, 0.05, 0, 0, 0]; ReferencePhotosyntheticRate=1; LightExtinctionCoefficient=0.8; GrowthTminimum=2; GrowthToptimum=22; GrowthTEffectExponent=1.7; HeatOnsetTemperature=30; HeatFullTemperature=36; HeatRecoverySumDD=20; HeatRecoveryTReference=25; ColdOnsetTemperature=2; ColdFullTemperature=-5; ColdRecoverySumDD=20; MaintenanceRespirationCoefficient=0.04; GrowthRespirationCoefficient=0.25; RespirationTReference=20; NThresholdsForLeaves=[0.045, 0.02, 0.055]; NThresholdsForStems=[0.0225, 0.01, 0.0275]; NThresholdsForStolons=[0.0225, 0.01, 0.0275]; NThresholdsForRoots=[0.0225, 0.01, 0.0275]; DegreesDayForGermination=125; TargetShootRootRatio=4; MaxRootAllocation=0.25; ShootRootGlfFactor=0.5; ReproSeasonReferenceLatitude=41; ReproSeasonTimingCoeff=0.14; ReproSeasonMaxAllocationIncrease=0.5; ReproSeasonAllocationCoeff=0.1; FractionLeafMaximum=0.56; FractionLeafMinimum=0.28; FractionLeafDMThreshold=500; FractionLeafDMFactor=2000; FractionLeafExponent=3; FractionToStolon=0.2; SpecificLeafArea=32; SpecificRootLength=45; StolonEffectOnLAI=0.3; ShootMaxEffectOnLAI=500; MaxStemEffectOnLAI=0.5; LiveLeavesPerTiller=3; TissueTurnoverRateShoot=0.05; TissueTurnoverRateRoot=0.02; DetachmentRateShoot=0.11; TurnoverTemperatureMin=2; TurnoverTemperatureRef=20; TurnoverTemperatureExponent=1; TurnoverDroughtEffectMax=1; TurnoverDroughtThreshold=0.5; TurnoverDefoliationCoefficient=0.5; TurnoverDefoliationRootEffect=0.1; FractionNLuxuryRemobilisable=[0.1, 0.1, 0.1]; MinimumNFixation=0.2; MaximumNFixation=0.6; SoilSaturationEffectMax=0.1; MinimumWaterFreePorosity=-1; SoilSaturationRecoveryFactor=0.25; NDillutionCoefficient=1; GlfGeneric=1; GlfSoilFertility=1; PlantHeightMinimum=300; PlantHeightMaximum=300; PlantHeightMassForMax=7500; PlantHeightExponent=2.5; RootDepthMinimum=30; RootDepthMaximum=350; RootElongationRate=25; RootDistributionDepthParam=70; RootDistributionExponent=2.5; RootBottomDistributionFactor=1.05; DigestibilitiesCellWall=[0.9, 0.8, 0.7, 0.2]; MinimumGreenWt=50; PreferenceForGreenOverDead=1; PreferenceForLeafOverStems=1; MaximumNUptake=10
        zero: LAI, PhotosyntheticPathway, UseHeatStressFactor, UseColdStressFactor, ColdRecoveryTReference, UseReproSeasonFactor, SymbiontCostFactor, NFixingCostFactor, FractionStolonStanding, WaterAvailableMethod, NitrogenAvailableMethod, LAIGreen
        initialDMFractionsLegumes=[0.16, 0.23, 0.22, 0.05, 0.03, 0.05, 0.05, 0.01, 0.04, 0.08, 0.08]
      Report ReportExample: EventNames=[Clock].EndOfDay
        VariableNames:
          [Clock].Today as Date
          // These examples are set up for Ryegrass and WhiteClover so add in any other species as needed for your simulation
          // The format of AggregationType (variable) from [Report].DayAfterLastOutput to [Clock].Today is used so that when the reporting frequency is changed the outputs are still sensible
          // If the name of the Report component ("ReportExample") here is changed in the simulation tree then all the references to that name in the outputs below also need to be changed
          // If all you want is harvested pasture or net herbage growth and/or standing biomass ....
          Sum of ([AGPRyegrass].HarvestedWt + [AGPWhiteClover].HarvestedWt) from [ReportExample].DayAfterLastOutput to [Clock].Today as HarvestedWt   //the amount harvested (kg DM /ha)
          Sum of ([AGPRyegrass].NetGrowthWt + [AGPWhiteClover].NetGrowthWt) from [ReportExample].DayAfterLastOutput to [Clock].Today as NetGrowthWt   //the amount harvested (kg DM /ha)
          Mean of ([AGPRyegrass].AboveGroundWt + [AGPWhiteClover].AboveGroundWt) from [ReportExample].DayAfterLastOutput to [Clock].Today as StandingBiomass   //pasture biomass (could also be reported as Last rather than Mean) (kg DM /ha)
          // outputs that are used more frequently than others
          Sum of ([AGPRyegrass].WaterDemand + [AGPWhiteClover].WaterDemand) from [ReportExample].DayAfterLastOutput to [Clock].Today as WaterDemand   //how much soil water the pasture could use (mm)
          Sum of (sum([AGPRyegrass].WaterUptake) + Sum([AGPWhiteClover].WaterUptake)) from [ReportExample].DayAfterLastOutput to [Clock].Today as WaterUptake    //the amount of water actuially taken up from the soil (mm)
          Sum of ([AGPRyegrass].SoilDemandN + [AGPWhiteClover].SoilDemandN) from [ReportExample].DayAfterLastOutput to [Clock].Today as NDemand                   //N demand (kg N /ha)
          Sum of ([AGPRyegrass].SoilUptakeN + [AGPWhiteClover].SoilUptakeN) from [ReportExample].DayAfterLastOutput to [Clock].Today as NitrogenUptake       //N uptake from the soil (kg N /ha)
          Sum of ([AGPRyegrass].SoilUptakeN + [AGPWhiteClover].SoilUptakeN) from [ReportExample].DayAfterLastOutput to [Clock].Today as NitrogenUptake       //N uptake from the soil (kg N /ha)
          Sum of [AGPWhiteClover].FixedN from [ReportExample].DayAfterLastOutput to [Clock].Today as NitrogenFixed       //N uptake from the soil (kg N /ha)
          Mean of ([AGPRyegrass].AboveGroundWt + [AGPWhiteClover].AboveGroundWt) from [ReportExample].DayAfterLastOutput to [Clock].Today as HerbageMass
          Mean of ([AGPRyegrass].LAIGreen + [AGPWhiteClover].LAIGreen) from [ReportExample].DayAfterLastOutput to [Clock].Today as LAIGreen
          Mean of ([AGPRyegrass].LAIDead + [AGPWhiteClover].LAIDead + [AGPRyegrass].LAIGreen + [AGPWhiteClover].LAIGreen) from [ReportExample].DayAfterLastOutput to [Clock].Today as LAITotal
          // outputs that indicate what conditions are limiting growth - each growth-limiting factor is 0 (full stress) to 1 (no stress) but there are two components and the values are added so 2 indicates no stress
          Mean of ([AGPRyegrass].GlfTemperature + [AGPWhiteClover].GlfTemperature) from [ReportExample].DayAfterLastOutput to [Clock].Today as GlfTemp       //stress from non-optimal temperature
          Mean of ([AGPRyegrass].GlfWaterSupply + [AGPWhiteClover].GlfWaterSupply) from [ReportExample].DayAfterLastOutput to [Clock].Today as GlfWater       //stress from water limitation
          Mean of ([AGPRyegrass].GlfNSupply + [AGPWhiteClover].GlfNSupply) from [ReportExample].DayAfterLastOutput to [Clock].Today as GlfNitrogen       //stress from N limitation
          // photsynthesis-related outputs - all these are in units of C not DM
          Sum of ([AGPRyegrass].GPP +[AGPWhiteClover].GPP) from [ReportExample].DayAfterLastOutput to [Clock].Today as GrossPrimaryProduction       //GPP (kg C /ha)
          Sum of ([AGPRyegrass].NPP +[AGPWhiteClover].NPP) from [ReportExample].DayAfterLastOutput to [Clock].Today as NettPrimaryProduction        //NPP (kg C /ha)
          // examples of more detailed tissue-based information - see the list of outputs for many more options
          [AGPRyegrass].LeafStage1NConc as RyegrassEmergingLeafNConc
          [AGPRyegrass].LeafStage2NConc as RyegrassDevelopingLeafNConc
          [AGPRyegrass].LeafStage3NConc as RyegrassMatureLeafNConc
          [AGPRyegrass].LeafStage4NConc as RyegrassDeadLeafNConc
      Report: EventNames=[Clock].EndOfDay
        VariableNames:
          [Clock].Today as Date
          // These examples are set up for Ryegrass and WhiteClover so add in any other species as needed for your simulation
          // The format of AggregationType (variable) from [Report].DayAfterLastOutput to [Clock].Today is used so that when the reporting frequency is changed the outputs are still sensible
          // If the name of the Report component ("Report") here is changed in the simulation tree then all the references to that name in the outputs below also need to be changed
          // If all you want is an annual pattern of harvested pasture based on the production year (July to June)  ....
          Sum of ([AGPRyegrass].HarvestedWt + [AGPWhiteClover].HarvestedWt) from 1-Jul to [Clock].Today as HarvestedWt   //the amount harvested (kg DM /ha)
  Experiment PastureByWaterAndNitrogen
    Factors
      Permutation
        Factor Nitrogen: Specification=[FertiliseFixedDates].Script.Amount=0 to 30 step 5
        Factor Water: Specification=[AutomaticIrrigation].Script.allowIrrigation=false,true
    Simulation Base
      Clock: Start=1980-07-01; End=1989-06-30
      Weather: FileName=%root%\Examples\WeatherFiles\lincoln.met
      SoilArbitrator
      Summary
      Zone Field: Area=1; Slope=0; AspectAngle=0; Altitude=50
        Manager CutRotation: same as AgPastureExample.Field.CutRotation
        Manager FertiliseFixedDates: same as AgPastureExample.Field.FertiliseFixedDates
        Manager AutomaticIrrigation
          allowIrrigation = True
          seasonStart = 1-sep
          seasonEnd = 30-apr
          seasonsAllocation = 10000
          triggerDeficit = 75
          targetDeficit = 95
          returndays = 3
          maximumAmount = 30
          depthPAWC = 300
          script: same as in AgPastureExample.Field.AutomaticIrrigation
        Manager ReportHelper
          ReportEveryYear_Name = [ReportAnnual]
          ReportEveryYear_Dates = 30-jun
          ReportSpecificDates_Name =
          ReportSpecificDates_Dates =
          NumYearsToDelay = 2
```csharp
using System;
using Models.Core;
using System.Collections.Generic;
using System.Text;
using Models.Soils;
using Models.PMF;
using Models;
using System.Xml.Serialization;
using APSIM.Shared.Utilities;

namespace Models
{
    [Serializable]
    public class Script : Model
    {
        [Link] Clock clock;
        [Link] Zone zone;
        [Link] Summary summary;

        [Separator("NOTE - all dates or date strings are entered with comma-separation and no spaces")]
        [Separator("NOTE - this component should be at the bottom of the list of Managers")]
        [Separator("   ")]
        [Separator("Reporting in particular days but the same days every year")]

        //ReportOnSpecificDaysEveryYear
        [Description("Name of the Report model for reporting on below dates every year: ")] 
        [Display(Type=DisplayType.Model, ModelType = typeof(Report.Report))]
        public Report.Report ReportEveryYear_Name { get; set; } 

        [Description("Enter one or more dates (as dd-mmm) for reporting : ")] 
        public string[] ReportEveryYear_Dates { get; set; } 

        [Separator("Reporting on absolute dates")]

        [Description("Name of the Report model for reporting on completely specified dates: ")] 
        [Display(Type=DisplayType.Model, ModelType = typeof(Report.Report))]
        public Report.Report ReportSpecificDates_Name { get; set; } 

        [Description("Enter one or more dates (as dd-mmm-yyyy) for reporting : ")] 
        public DateTime[] ReportSpecificDates_Dates { get; set; } 

        [Separator("Delay the start of reporting")]

        [Description("Number of years from the start of the simulation to delay reporting : ")] 
        public int NumYearsToDelay { get; set; } 

        private double YearCount = 0; // to do the delay in reporting

        [EventSubscribe("StartOfSimulation")]
        private void OnStartOfSimulation(object sender, EventArgs e)
        {
            YearCount = 0.0;
        }

        [EventSubscribe("DoManagementCalculations")]
        private void OnDoManagement(object sender, EventArgs e)
        {
            if ((clock.Today.Year - clock.StartDate.Year) >= NumYearsToDelay)
            {
                // example for reporting on irregular dates but the same dates every year
                if (ReportEveryYear_Dates != null)
                    foreach (string ddMMM in ReportEveryYear_Dates)
                        if (DateUtilities.DatesEqual(ddMMM, clock.Today))
                            ReportEveryYear_Name.DoOutput();

                // example for reporting on fully-specified dates that are not necessarily the same dates every year
                if (ReportSpecificDates_Dates != null)
                    foreach (DateTime ddMMMyy in ReportSpecificDates_Dates)
                        if (DateUtilities.Equals(ddMMMyy, clock.Today))
                            ReportSpecificDates_Name.DoOutput();
            }

        }
        
    }
}
```
        MicroClimate: a_interception=0; b_interception=1; c_interception=0; d_interception=0; soil_albedo=0.23; SoilHeatFluxFraction=0.4; NightInterceptionFraction=0.5; ReferenceHeight=2
        Irrigation
        Fertiliser
        SurfaceOrganicMatter: InitialResidueName=Sward; InitialResidueType=grass; InitialResidueMass=1000; InitialStandingFraction=0; InitialCPR=0; InitialCNR=15; FractionFaecesAdded=0.5
        Soil: same as AgPastureExample.Field.Soil
        PastureSpecies AGPRyegrass: same as AgPastureExample.Field.AGPRyegrass
        PastureSpecies AGPWhiteClover: same as AgPastureExample.Field.AGPWhiteClover
        Report ReportAnnual: EventNames=//[Clock].EndOfMonth
          VariableNames:
            [Clock].Today as Date
            [Clock].Today.Year as Year
            Sum of [FertiliseFixedDates].Script.Amount from 1-Jul to [Clock].Today as FertiliserNApplied_kgN_ha   // fertiliser applied
            Sum of [Fertiliser].NitrogenApplied from 1-Jul to [Clock].Today as FertiliserNApplied_kgN_ha   // fertiliser applied
            Sum of ([AGPRyegrass].HarvestedWt + [AGPWhiteClover].HarvestedWt) / 1000.0 from 1-Jul to [Clock].Today as HarvestedWt_t_ha   //the amount harvested (kg DM /ha)
  Experiment CO2xBaseTemperature
    Factors
      Permutation
        Factor CO2Level: Specification=[CO2Parameters].Script.CO2=350,700
        Factor Tb: Specification=[TemperatureParameters].Script.GrowthTminimum=0,2,5,10,15
    Simulation CO2xTb
      Clock: Start=1980-07-01; End=1985-06-30
      Weather: FileName=%root%\Examples\WeatherFiles\lincoln.met
      SoilArbitrator
      Summary
      Zone Field: Area=1; Slope=0; AspectAngle=0; Altitude=50
        Manager CutRotation: same as AgPastureExample.Field.CutRotation
        Manager CO2Parameters
          Pasture = [AGPRyegrass]
          CO2 = 350
          ReferenceCO2 = 380
          CO2EffectScaleFactor = 700
          CO2EffectOffsetFactor = 600
          CO2EffectExponent = 2
```csharp
// An example to show to change parameters.  
// Parameters presented are used to calculate CO2 and temperature effects on photosynthesis and, therefore, can be used in sensibility analysis. 

using System;
using System.Collections.Generic;
using System.Xml.Serialization;
using Models.Core;
using Models.PMF;
using Models.Soils;
using APSIM.Shared.Utilities;
using Models.Interfaces;

namespace Models
{
    [Serializable]
    public class Script : Model
    {
        // - Links to APSIM models
        [Link] Zone myZone;
        [Link] Clock Clock;
        [Link] Weather Weather;
        [Link] ISummary summary = null;

        [Separator("Species subjected to this manager")]
        [Description("Species")]
        [Display(Type=DisplayType.Model, ModelType = typeof(AgPasture.PastureSpecies))]
        public IModel Pasture {get; set;}

        [Separator("Parameters for the effect of CO2 on photosynthesis and N demand under high CO2")]
        [Description("Atmospheric CO2")]
        public double CO2 { get; set; }
        [Description("Reference CO2 concentration for photosynthesis(ppm)")]
        public double ReferenceCO2 { get; set; }
        [Description("Scaling parameter for the CO2 effect on photosynthesis")]
        public double CO2EffectScaleFactor { get; set ; }
        [Description("Scaling parameter for CO2 effects on N requirements (ppm)")]
        public double CO2EffectOffsetFactor { get; set; }
        [Description("Exponent controlling CO2 effect on N requirements")]
        public double CO2EffectExponent { get; set; }
       
        


        [EventSubscribe("Commencing")]
        private void OnSimulationCommencing(object sender, EventArgs e)
        {
           (Weather).CO2 = CO2;
           (Pasture as AgPasture.PastureSpecies).ReferenceCO2 = ReferenceCO2;
           (Pasture as AgPasture.PastureSpecies).CO2EffectScaleFactor = CO2EffectScaleFactor;
           (Pasture as AgPasture.PastureSpecies).CO2EffectOffsetFactor = CO2EffectOffsetFactor;
           (Pasture as AgPasture.PastureSpecies).CO2EffectExponent = CO2EffectExponent;

        }
        
           }
}
```
        Manager TemperatureParameters
          Pasture = [AGPRyegrass]
          GrowthTminimum = 1
          GrowthToptimum = 20
          HeatOnsetTemperature = 28
          HeatFullTemperature = 35
          ColdOnsetTemperature = 1
          ColdFullTemperature = -5
```csharp
// An example to show to change parameters.  
// Parameters presented are used to calculate CO2 and temperature effects on photosynthesis and, therefore, can be used in sensibility analysis. 

using System;
using System.Collections.Generic;
using System.Xml.Serialization;
using Models.Core;
using Models.PMF;
using Models.Soils;
using APSIM.Shared.Utilities;
using Models.Interfaces;

namespace Models
{
    [Serializable]
    public class Script : Model
    {
        // - Links to APSIM models
        [Link] Zone myZone;
        [Link] Clock Clock;
        [Link] ISummary summary = null;

        [Separator("Species subjected to this manager")]
        [Description("Species")]
        [Display(Type=DisplayType.Model, ModelType = typeof(AgPasture.PastureSpecies))]
        public IModel Pasture {get; set;}


       
        [Separator("Temperature parameters for photosynthesis")]
        [Description("Minimum temperature for growth (oC)")]
        public double GrowthTminimum { get; set; }
        [Description("Optimum temperature for growth")]
        public double GrowthToptimum { get; set; }
        [Description("Onset temperature for heat damage on photosynthesis")]
        public double HeatOnsetTemperature { get; set; }
        [Description("Temperature for full heat damage effect on photosynthesis")]
        public double HeatFullTemperature { get; set; }
        [Description("Onset temperature for cold damage on photosynthesis")]
        public double ColdOnsetTemperature { get; set; }
        [Description("Temperature for full cold damage on photosynthesis")]
        public double ColdFullTemperature { get; set; }


        [EventSubscribe("Commencing")]
        private void OnSimulationCommencing(object sender, EventArgs e)
        {
           
           (Pasture as AgPasture.PastureSpecies).GrowthTminimum = GrowthTminimum;
           (Pasture as AgPasture.PastureSpecies).GrowthToptimum = GrowthToptimum;
           (Pasture as AgPasture.PastureSpecies).HeatOnsetTemperature = HeatOnsetTemperature;
           (Pasture as AgPasture.PastureSpecies).HeatFullTemperature = HeatFullTemperature;
           (Pasture as AgPasture.PastureSpecies).ColdOnsetTemperature = ColdOnsetTemperature;
           (Pasture as AgPasture.PastureSpecies).ColdFullTemperature = ColdFullTemperature;
        }
        
           }
}
```
        MicroClimate: a_interception=0; b_interception=1; c_interception=0; d_interception=0; soil_albedo=0.23; SoilHeatFluxFraction=0.4; NightInterceptionFraction=0.5; ReferenceHeight=2
        Irrigation
        Fertiliser
        SurfaceOrganicMatter: InitialResidueName=Sward; InitialResidueType=grass; InitialResidueMass=1000; InitialStandingFraction=0; InitialCPR=0; InitialCNR=15; FractionFaecesAdded=0.5
        Soil: same as AgPastureExample.Field.Soil
        PastureSpecies AGPRyegrass: same as AgPastureExample.Field.AGPRyegrass
        PastureSpecies AGPWhiteClover: same as AgPastureExample.Field.AGPWhiteClover
        Report: EventNames=[Clock].EndOfDay
          VariableNames:
            [Clock].Today as Date
            // These examples are set up for Ryegrass and WhiteClover so add in any other species as needed for your simulation
            // The format of AggregationType (variable) from [Report].DayAfterLastOutput to [Clock].Today is used so that when the reporting frequency is changed the outputs are still sensible
            // If the name of the Report component ("Report") here is changed in the simulation tree then all the references to that name in the outputs below also need to be changed
            // If all you want is an annual pattern of harvested pasture based on the production year (July to June)  ....
            Sum of ([AGPRyegrass].HarvestedWt + [AGPWhiteClover].HarvestedWt) from 1-Jul to [Clock].Today as HarvestedWt   //the amount harvested (kg DM /ha)
            [AGPRyegrass].HarvestedWt from 1-Jul to [Clock].Today as RGHarvestedWt
            [AGPWhiteClover].HarvestedWt from 1-Jul to [Clock].Today as WCHarvestedWt
            [Weather].CO2 as CO2
  Experiment CO2xHeatOnset
    Factors
      Permutation
        Factor HeatOnset: Specification=[AGPRyegrass].HeatOnsetTemperature=15 to 35 step 10
        Factor CO2: Specification=[Weather].CO2=350,700
    Simulation CO2xHeat
      Clock: Start=1980-07-01; End=1985-06-30
      Weather: FileName=%root%\Examples\WeatherFiles\lincoln.met
      SoilArbitrator
      Summary
      Zone Field: Area=1; Slope=0; AspectAngle=0; Altitude=50
        Manager CutRotation: same as AgPastureExample.Field.CutRotation
        MicroClimate: a_interception=0; b_interception=1; c_interception=0; d_interception=0; soil_albedo=0.23; SoilHeatFluxFraction=0.4; NightInterceptionFraction=0.5; ReferenceHeight=2
        Irrigation
        Fertiliser
        SurfaceOrganicMatter: InitialResidueName=Sward; InitialResidueType=grass; InitialResidueMass=1000; InitialStandingFraction=0; InitialCPR=0; InitialCNR=15; FractionFaecesAdded=0.5
        Soil: same as AgPastureExample.Field.Soil
        PastureSpecies AGPRyegrass: same as AgPastureExample.Field.AGPRyegrass
        Report: EventNames=[Clock].EndOfDay
          VariableNames:
            [Clock].Today as Date
            // These examples are set up for Ryegrass and WhiteClover so add in any other species as needed for your simulation
            // The format of AggregationType (variable) from [Report].DayAfterLastOutput to [Clock].Today is used so that when the reporting frequency is changed the outputs are still sensible
            // If the name of the Report component ("Report") here is changed in the simulation tree then all the references to that name in the outputs below also need to be changed
            // If all you want is an annual pattern of harvested pasture based on the production year (July to June)  ....
            sum of [AGPRyegrass].HarvestedWt from 1-Jul to [Clock].Today as HarvestedWt   //the amount harvested (kg DM /ha)
            [AGPRyegrass].HarvestedWt from 1-Jul to [Clock].Today as RGHarvestedWt
        Manager Fertilise on fixed dates (advanced version)
          EachYear = True
          Dates = 1-aug,1-sep,1-oct,1-nov,1-dec,1-jan,1-feb,1-mar,1-apr,1-may
          UseCritNThreshold = False
          CritNThreshold = 50
          CritNDepth = 75
          Depth = 50
          Amount = 50
          FertiliserType = UreaN
          script: same as in AgPastureExample.Field.FertiliseFixedDates
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