Simulations: Version=162
  DataStore
  Simulation GliricidiaStripCropExample
    Clock: Start=1984-01-01; End=1990-12-31
    Summary SummaryFile
    Weather: FileName=%root%\Examples\WeatherFiles\Makoka.met
    MicroClimate: a_interception=0; b_interception=1; c_interception=0; d_interception=0; SoilHeatFluxFraction=0.4; MinimumHeightDiffForNewLayer=0; NightInterceptionFraction=0.5; ReferenceHeight=2
    Manager GliricidiaManagement
      Harvest1Date = 15-feb
      Harvest2Date = 15-sep
      Harvest3Date = 15-dec
      AddGliricidiaResidues = True
      LeafRemovalWt = 0
      LeafRemovalN = 0
      StemRemovalWt = 0
      StemRemovalN = 0
      TotalRemovalWt = 0
      TotalRemovalN = 0
```csharp
using Models.Soils;
using APSIM.Shared.Utilities;
using System.Xml.Serialization;
using Models.Surface;
using Models.PMF.Organs;
using Models.PMF;
using Models.Core;
using System.Collections.Generic;
using System;
using System.Linq;
using Newtonsoft.Json;


namespace Models
{
    [Serializable] 
    [System.Xml.Serialization.XmlInclude(typeof(Model))]
    public class Script : Model
    {
        [Link(ByName = true)] Plant Gliricidia;
        [Link(ByName = true)] SurfaceOrganicMatter MaizeZoneSurfaceOrganicMatter;
        [Link(ByName = true)] Zone MaizeZone;
        [Link(ByName = true)] Zone GliricidiaZone;
        [Link] Clock Clock;


        [Description("First Harvest (d-mmm)")]
        public string Harvest1Date { get; set; }
        [Description("Second Harvest (d-mmm)")]
        public string Harvest2Date { get; set; }
        [Description("Third Harvest (d-mmm)")]
        public string Harvest3Date { get; set; }

        [Description("Add gliricidia residues to mazie zone")]
        public bool AddGliricidiaResidues { get; set; }
    
        [JsonIgnore] private RemovalFractions Remove { get; set; }

        [Description("Leaf Removal Wt")]
        public double LeafRemovalWt {get; set;}
        [Description("Leaf Removal N")]
        public double LeafRemovalN {get; set;}


        [Description("Stem Removal Wt")]
        public double StemRemovalWt {get; set;}
        [Description("Stem Removal N")]
        public double StemRemovalN {get; set;}


        [Description("Total Removal Wt")]
        public double TotalRemovalWt {get; set;}
        [Description("Total Removal N")]
        public double TotalRemovalN {get; set;}


        [EventSubscribe("StartOfSimulation")]
        private void OnSimulationCommencing(object sender, EventArgs e)
        {
            Remove = new RemovalFractions();
        }

        [EventSubscribe("StartOfDay")]
        private void OnStartOfDay(object sender, EventArgs e)
        {

        LeafRemovalWt = 0;
        StemRemovalWt = 0;
        LeafRemovalN = 0;
        StemRemovalN = 0;

            if (DateUtilities.WithinDates(Harvest1Date, Clock.Today, Harvest1Date) ||
                DateUtilities.WithinDates(Harvest2Date, Clock.Today, Harvest2Date) ||
                DateUtilities.WithinDates(Harvest3Date, Clock.Today, Harvest3Date))
            {
                if (Gliricidia.IsAlive)
                	DoCut(10,25);   
            }

        }

        public void DoCut(double LeafResidue, double StemResidue)
        {
            double Lwt = (double)Gliricidia.FindByPath("Leaf.Live.Wt").Value;
            double Ln = (double)Gliricidia.FindByPath("Leaf.Live.N").Value;
            double LeafRemovalFraction = 0;

            if (Lwt > 0)
                LeafRemovalFraction = (Lwt - LeafResidue) / Lwt;
            if (LeafRemovalFraction < 0)
                LeafRemovalFraction = 0;
            LeafRemovalWt = (Lwt - LeafResidue);
            LeafRemovalN = Ln * LeafRemovalFraction;
                               
            double Swt = (double)Gliricidia.FindByPath("Stem.Live.Wt").Value;
            double Sn = (double)Gliricidia.FindByPath("Stem.Live.N").Value;
            double StemRemovalFraction = 0;

            if (Swt > 0)
                StemRemovalFraction = (Swt - StemResidue) / Swt;             
            if (StemRemovalFraction < 0)
                StemRemovalFraction = 0;
            StemRemovalWt = (Swt - StemResidue);  
            StemRemovalN = Sn * StemRemovalFraction;
               
            Remove.SetFractionToRemove("Leaf", LeafRemovalFraction);
            Remove.SetFractionToRemove("Stem", StemRemovalFraction);
            Remove.SetFractionToResidue("Leaf", 0.0);
            Remove.SetFractionToResidue("Stem", 0.0);
            Gliricidia.RemoveBiomass("Cut", Remove);

            if (AddGliricidiaResidues)
            {
            double FOMadded = (LeafRemovalWt)*10.0*GliricidiaZone.Area/MaizeZone.Area;
            double FONadded = (LeafRemovalN)*10.0*GliricidiaZone.Area/MaizeZone.Area;

            MaizeZoneSurfaceOrganicMatter.Add(FOMadded, FONadded,0.0,"gliricidia","gliricidia");
            }

        }
        
    }
}
```
    SoilArbitrator Soil Arbitrator
    RectangularZone GliricidiaZone: Length=1; Width=2; Slope=0; AspectAngle=0; Altitude=50
      Report GliricidiaZoneReport: EventNames=[Clock].DoReport
        VariableNames:
          [Clock].Today
          sum([Soil].Water.MM) as GliricidiaZoneSWTot
          [Gliricidia].AboveGround.Wt
          [Gliricidia].Leaf.LAI
      Fertiliser
      SurfaceOrganicMatter: InitialResidueName=wheat_stubble; InitialResidueType=wheat; InitialResidueMass=500; InitialStandingFraction=0; InitialCPR=0; InitialCNR=100
      Manager SetupGliricidiaRootZones
        UseExtraZone = True
```csharp
using Models.Soils;
using Models.Functions;
using APSIM.Shared.Utilities;
using System.Xml.Serialization;
using Models;
using Models.PMF;
using System.Text;
using System.Collections.Generic;
using Models.Core;
using System;
using System.Linq;
using Models.PMF.Organs;

namespace Models
{
    [Serializable] 
    public class Script : Model
    {
        [Link] private Plant Gliricidia;
        [Link] private Clock Clock;
        [Link] private Zone zone;
        [Link(Type = LinkType.Path, Path = "[Gliricidia].Root")]
        private Root root;

        [Description("Use extra root zone")]
        public bool UseExtraZone { get; set; }

        
        [EventSubscribe("StartOfSimulation")]
        private void OnSimulationCommencing(object sender, EventArgs e)
        {
            if (UseExtraZone)
            {
            root.ZoneNamesToGrowRootsIn.Add("MaizeZone");
            root.ZoneRootDepths.Add(50);
NutrientPoolFunctions InitialDM = new NutrientPoolFunctions();
Constant InitStruct = new Constant();
InitStruct.FixedValue = 10;
InitialDM.Structural = InitStruct;
Constant InitMetab = new Constant();
InitMetab.FixedValue = 0;
InitialDM.Metabolic = InitMetab;
Constant InitStor = new Constant();
InitStor.FixedValue = 0;
InitialDM.Storage = InitStor;
            root.ZoneInitialDM.Add(InitialDM);

            }
        }
    }
}
```
      Plant Gliricidia
      Operations GliricidiaSowing
        1984-12-15  [Gliricidia].Sow(population: 0.74, cultivar: GliricidiaYoung,depth: 100, rowSpacing: 1500);
      Soil GliricidiaZoneSoil: Site=Bugesera; NearestTown=Nyamata; Region=Bugesera; Country=Rwanda; Latitude=-2.15; Longitude=30.45; DataSource=Rwanda soil database using properties for Ferralsol
        Water: InitialPAWmm=174.5; RelativeTo=LL15; FilledFromTop=true
          Thickness=[200, 200, 200, 200, 200, 200, 200, 200, 200, 200, 500, 500]
          InitialValues=[0.36, 0.36, 0.34, 0.1325, 0.08, 0.08, 0.08, 0.08, 0.08, 0.08, 0.08, 0.08]
        CERESSoilTemperature Temperature
        Nutrient
        WaterBalance SoilWater: SummerDate=1-Nov; SummerU=9; SummerCona=2.5; WinterDate=1-Apr; WinterU=9; WinterCona=2.5; DiffusConst=40; DiffusSlope=16; Salb=0.13; CN2Bare=65; CNRed=20; CNCov=0.8; PSIDul=-100; Thickness=[200, 1800, 1000]; SWCON=[0.2, 0.1, 0]
        Physical
          Thickness  BD    AirDry  LL15  DUL   SAT
          200        1.42  0.01    0.08  0.36  0.46
          200        1.45  0.01    0.08  0.36  0.453
          200        1.47  0.01    0.08  0.34  0.445
          200        1.31  0.01    0.08  0.33  0.44
          200        1.42  0.01    0.08  0.33  0.44
          200        1.38  0.01    0.08  0.32  0.44
          200        1.32  0.01    0.08  0.31  0.44
          200        1.3   0.01    0.08  0.3   0.44
          200        1.31  0.01    0.08  0.3   0.44
          200        1.31  0.01    0.08  0.29  0.44
          500        1.31  0.01    0.08  0.29  0.44
          500        1.31  0.01    0.08  0.29  0.44
          SoilCrop MaizeSoil
            LL=[0.05, 0.05, 0.05, 0.05, 0.1, 0.1, 0.1, 0.1, 0.1, 0.1, 0.1, 0.1]
            KL=[0.05, 0.05, 0.05, 0.05, 0.05, 0.04, 0.03, 0.02, 0.02, 0.02, 0, 0]
            XF=[1, 1, 1, 1, 0.6, 0.6, 0, 0, 0, 0, 0, 0]
          SoilCrop GliricidiaSoil
            LL=[0.02, 0.02, 0.02, 0.02, 0.02, 0.02, 0.02, 0.02, 0.02, 0.02, 0.02, 0.02]
            KL=[0.1, 0.1, 0.1, 0.1, 0.1, 0.1, 0.1, 0.1, 0.02, 0.02, 0.02, 0.02]
            XF=[1, 1, 1, 1, 1, 1, 1, 1, 1, 0, 0, 0]
        Organic: FOMCNRatio=15; CarbonUnits=Total
          Thickness  Carbon  SoilCNRatio  FBiom  FInert  FOM
          200        0.8     14.3         0.02   0.7     27.2762
          200        0.6     14.3         0.01   0.7     20.2067
          200        0.4     14.3         0.01   0.7     14.9695
          200        0.2     14.3         0.01   0.7     11.0897
          200        0.2     14.3         0.01   0.7     8.21543
          200        0.1     14.3         0.01   0.7     6.08614
          200        0.05    14.3         0.01   0.7     4.50872
          200        0.05    14.3         0.01   0.7     3.34014
          200        0.05    14.3         0.01   0.7     2.47444
          200        0.05    14.3         0.01   0.7     1.83311
        Chemical: Thickness=[200, 200, 200, 200, 200, 200, 200, 200, 200, 200]; PH=[5.9, 5.6, 5.8, 5.9, 6.1, 6.3, 6.2, 6.4, 6.3, 5.9]; PHUnits=Water
        Solute NO3: Thickness=[200, 200, 200, 200, 200, 200, 200, 200, 200, 200]; InitialValuesUnits=ppm; WaterTableConcentration=0; D0=0; DepthConstant=0; MaxDepthSoluteAccessible=0; RunoffEffectivenessAtMovingSolute=0; MaxEffectiveRunoff=0
          InitialValues=[0.457746, 0.0593066, 0.0593066, 0.0593066, 0.0593066, 0.0593066, 0.0593066, 0.0593066, 0.0593066, 1]
        Solute NH4: Thickness=[200, 200, 200, 200, 200, 200, 200, 200, 200, 200]; InitialValuesUnits=ppm; WaterTableConcentration=0; D0=0; DepthConstant=0; MaxDepthSoluteAccessible=0; RunoffEffectivenessAtMovingSolute=0; MaxEffectiveRunoff=0
          InitialValues=[0.84507, 0.109489, 0.109489, 0.109489, 0.109489, 0.109489, 0.109489, 0.109489, 0.109489, 0.2]
        Solute Urea: Thickness=[200, 200, 200, 200, 200, 200, 200, 200, 200, 200]; InitialValues=[0, 0, 0, 0, 0, 0, 0, 0, 0, 0]; InitialValuesUnits=kg/ha; WaterTableConcentration=0; D0=0; DepthConstant=0; MaxDepthSoluteAccessible=0; RunoffEffectivenessAtMovingSolute=0; MaxEffectiveRunoff=0
    RectangularZone MaizeZone: Length=1; Width=6; Slope=0; AspectAngle=0; Altitude=50
      Report: EventNames=[Clock].DoReport
        VariableNames:
          [Clock].Today
          [Clock].Today.Year
          [Maize].AboveGround.Wt
      Fertiliser
      SurfaceOrganicMatter MaizeZoneSurfaceOrganicMatter: InitialResidueName=wheat_stubble; InitialResidueType=wheat; InitialResidueMass=500; InitialStandingFraction=0; InitialCPR=0; InitialCNR=100
      Irrigation
      Plant Maize
      Soil MaizeZoneSoil: same as GliricidiaStripCropExample.GliricidiaZone.GliricidiaZoneSoil
      Manager Harvesting
        RemoveFraction = 1
```csharp
using Models.PMF.Phen;
using APSIM.Shared.Utilities;
using System.Xml.Serialization;
using Models;
using Models.Surface;
using Models.PMF;
using Models.Soils;
using System.Text;
using System.Collections.Generic;
using Models.Core;
using System;
using System.Linq;
using Models.Soils.Nutrients;

namespace Models
{
    [Serializable] 
    public class Script : Model
    {
        [Link] private Plant Maize;
        [Link] private Zone zone;
        [Link] private SurfaceOrganicMatter SOM;
        [Link] private Clock clock;
        [Link] private Models.Report report;
        [Link(Type = LinkType.Path, Path = "[Maize].Phenology")]
        private Phenology phenology;

        [Description("Fraction of resiudes to remove at harvest (0-1)")]
        public double RemoveFraction { get; set; }

    
        [EventSubscribe("DoManagement")]
        private void OnDoManagement(object sender, EventArgs e)
        {
            if (phenology.CurrentPhase.Name == "ReadyForHarvesting")
            {
                Maize.Harvest();
                Maize.EndCrop();
                if (RemoveFraction > 0)
                    SOM.Incorporate(RemoveFraction, 0.0);         

            }
        }
        
        [EventSubscribe("DoManagementCalculations")]
        private void OnDoManagementCalculations(object sender, EventArgs e)
        {
            
        }
    }
}
```
      Manager SowingFertiliser
        Amount = 0
        CropName = Maize
```csharp
using Models.Soils;
using System.Linq;
using System;
using Models.Core;
using Models.PMF;
namespace Models
{
    [Serializable]
    public class Script : Model
    {
        [Link] Clock Clock;
        [Link] Fertiliser Fertiliser;
        [Link] Summary Summary;
        
        
        [Description("Amount of fertiliser to be applied (kg/ha)")]
        public double Amount { get; set; }
        
        [Description("Crop to be fertilised")]
        public string CropName { get; set; }
        
        
        

        [EventSubscribe("Sowing")]
        private void OnSowing(object sender, EventArgs e)
        {
            Model crop = sender as Model;
            if (crop.Name.ToLower() == CropName.ToLower())
                Fertiliser.Apply(Amount: Amount, Type: Fertiliser.Types.NO3N);
        }
        
    }
}
```
      Manager MaizeCalculations
        EffectiveYieldFactor = 1
```csharp
using Models.Soils;
using System.Linq;
using System;
using System.Collections.Generic;
using Models.Core;
using Models.PMF;
using Models.PMF.Interfaces;
using Models.Surface;
using System.Xml.Serialization;
using APSIM.Shared.Utilities;
using Models.Interfaces;
using Models.PMF.Organs;

namespace Models
{
    [Serializable] 
    [System.Xml.Serialization.XmlInclude(typeof(Model))]
    public class Script : Model
    {
        [Link(ByName = true)] ReproductiveOrgan Grain;
        [Link(ByName = true)] Zone MaizeZone;
        [Link(ByName = true)] Zone GliricidiaZone;
        [Link] Clock Clock;

        [Description("Effective Yield Factor")]
        public double EffectiveYieldFactor { get; set; }

        [Description("EffectiveYield")]
        public double EffectiveYield 
        {
           get
           { 
           return Grain.Live.Wt * EffectiveYieldFactor;
           }
        }




    }
}
```
      Manager SowingRule
        StartDate = 12-Dec
        EndDate = 30-Jan
        MinESW = 30
        MinRain = 30
        RainDays = 10
        CultivarName = Katumani
        SowingDepth = 30
        RowSpacing = 750
        Population = 4.44
```csharp
using Models.Interfaces;
using APSIM.Shared.Utilities;
using Models.Utilities;
using Models.Soils;
using Models.PMF;
using Models.Core;
using System;
using System.Linq;
using Models.Climate;

namespace Models
{
    [Serializable]
    public class Script : Model
    {
        [Link] private Clock Clock;
        [Link] private Fertiliser Fertiliser;
        [Link] private Summary Summary;
        [Link] private Plant Maize;
        [Link] private Soil Soil;
        private Accumulator accumulatedRain;
        [Link]
        private ISoilWater waterBalance;
        
        [Description("Start of sowing window (d-mmm)")]
        public string StartDate { get; set; }
        [Description("End of sowing window (d-mmm)")]
        public string EndDate { get; set; }
        [Description("Minimum extractable soil water for sowing (mm)")]
        public double MinESW { get; set; }
        [Description("Accumulated rainfall required for sowing (mm)")]
        public double MinRain { get; set; }
        [Description("Duration of rainfall accumulation (d)")]
        public int RainDays { get; set; }
        [Description("Cultivar to be sown")]
        public string CultivarName { get; set; }
        [Description("Sowing depth (mm)")]
        public double SowingDepth { get; set; }
        [Description("Row spacing (mm)")]
        public double RowSpacing { get; set; }
        [Description("Plant population (/m2)")]
        public double Population { get; set; }
        
        
        [EventSubscribe("StartOfSimulation")]
        private void OnSimulationCommencing(object sender, EventArgs e)
        {
            accumulatedRain = new Accumulator(this, "[Weather].Rain", RainDays);
        }
        

        [EventSubscribe("DoManagement")]
        private void OnDoManagement(object sender, EventArgs e)
        {
            accumulatedRain.Update();
            
            if ((DateUtilities.WithinDates(StartDate, Clock.Today, EndDate) &&
                Maize.IsAlive != true &&
                MathUtilities.Sum(waterBalance.ESW) > MinESW &&
                accumulatedRain.Sum > MinRain) ||
               (DateUtilities.WithinDates(EndDate, Clock.Today, EndDate) &&
                Maize.IsAlive != true))
            {
                Maize.Sow(population: Population, cultivar: CultivarName, depth: SowingDepth, rowSpacing: RowSpacing);    
            }
        
        }
        
    }
}
```
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