Simulations: Version=80
  DataStore
  Simulation Single Tree Example
    Clock: Start=1900-01-01; End=1900-12-31
    Summary SummaryFile
    Weather: FileName=%root%\Examples\WeatherFiles\Dalby.met
    SoilArbitrator Soil Arbitrator
    AgroforestrySystem SingleTreeSystem: RainfallInterceptionFraction=0; RainShaddowWidth=0; Slope=0; AspectAngle=0; Altitude=50
      TreeProxy: RootRadius=0.02; NumberOfTrees=0; Kd=1e-07; BaseKL=0.02; KValue=0; Heights=[1000, 2000, 3000, 4000, 5000]; NDemands=[0.1, 0.1, 0.1, 0.1, 0.1]; ShadeModifiers=[1, 1, 1, 1, 1]
        Table=[[Parameter, 0, 0.5h, 1h, 1.5h, 2h, 2.5h, 3h, 4h, 5h, 6h], [Shade (%), Root Length Density (cm/cm3), Depth (cm), 0-15, 15-30, 30-60, 60-90, 90-120, 120-150, 150-180], [60, -, -, 6, 5, 4, 2, 1.5, 1, 1], [50, -, -, 6, 5, 4, 2, 1.5, 1, 0], [40, -, -, 5, 4, 3.5, 2, 1.5, 1, 0], [30, -, -, 4, 3, 3, 1.5, 1, 1, 0], [20, -, -, 3, 2, 2, 1, 0, 0, 0], [0, -, -, 2, 1, 1, 0, 0, 0, 0], [0, -, -, 1, .5, .2, 0, 0, 0, 0], [0, -, -, 0, 0, 0, 0, 0, 0, 0], [0, -, -, 0, 0, 0, 0, 0, 0, 0], [0, -, -, 0, 0, 0, 0, 0, 0, 0]]
        Dates=[1900-01-01, 1900-03-01, 1900-06-01, 1900-09-01, 1900-12-31]
      Manager SowingRule
        StartDate = 1-may
        EndDate = 10-jul
        MinESW = 10
        ESWZoneName = 0 to 5m
        MinRain = 25
        RainDays = 7
        CultivarName = Hartog
        SowingDepth = 30
        RowSpacing = 250
        Population = 120
        Amount = 100
        CropName = wheat
```csharp
using System;
using System.Collections.Generic;
using Models.Core;
using Models.Agroforestry;
using Models.PMF;
using Models.Soils;
using Models.Utilities;
using Models.Zones;
using APSIM.Shared.Utilities;

namespace Models
{
    [Serializable]
    public class Script : Model
    {
        [Link] Clock Clock;
        [Link] Summary Summary;
        Accumulator accumulatedRain;
        
        [Description("Start of sowing window (d-mmm)")]
        public string StartDate { get; set; }
        [Description("End of sowing window (d-mmm)")]
        public string EndDate { get; set; }
        [Description("Minimum extractable soil water for sowing (mm)")]
        public double MinESW { get; set; }
        [Description("Name of Zone to use for minimum ESW condition")]
        public string ESWZoneName { get; set; }
        [Description("Accumulated rainfall required for sowing (mm)")]
        public double MinRain { get; set; }
        [Description("Duration of rainfall accumulation (d)")]
        public int RainDays { get; set; }
        [Description("Cultivar to be sown")]
        public string CultivarName { get; set; }
        [Description("Sowing depth (mm)")]
        public double SowingDepth { get; set; }
        [Description("Row spacing (mm)")]
        public double RowSpacing { get; set; }
        [Description("Plant population (/m2)")]
        public double Population { get; set; }
        [Description("Amount of fertiliser to be applied (kg/ha)")]
        public double Amount { get; set; }
        [Description("Crop to be fertilised")]
        public string CropName { get; set; }
        
        private Zone ESWZone;
        private List<IModel> Zones;
        private Plant Wheat;
        private Soil Soil;
        
        [EventSubscribe("Commencing")]
        private void OnSimulationCommencing(object sender, EventArgs e)
        {
            Zones = Apsim.FindAll(this, typeof(CircularZone));
            foreach (Model m in Zones)
            {
                if (m.Name == ESWZoneName)
                {
                    ESWZone = m as Zone;
                    break;
                }
            }
            accumulatedRain = new Accumulator(this, "[Weather].Rain", RainDays);
        }
        
        [EventSubscribe("DoManagement")]
        private void OnDoManagement(object sender, EventArgs e)
        {        
            accumulatedRain.Update();
            
            Soil ESWSoil = Apsim.Find(ESWZone, typeof(Soil)) as Soil;
            
            foreach (Zone z in Zones)
            {
                Wheat = Apsim.Find(z, typeof(Plant)) as Plant;    
                Soil = Apsim.Find(z, typeof(Soil)) as Soil;
                        
                if (Wheat != null && DateUtilities.WithinDates(StartDate, Clock.Today, EndDate) &&
                    !Wheat.IsAlive &&
                    MathUtilities.Sum(ESWSoil.SoilWater.ESW) > MinESW &&
                    accumulatedRain.Sum > MinRain)
                {
                    Wheat.Sow(population: Population, cultivar: CultivarName, depth: SowingDepth, rowSpacing: RowSpacing);
                    Fertiliser Fertiliser = Apsim.Find(Wheat.Parent, typeof(Fertiliser)) as Fertiliser;
                    Fertiliser.Apply(Amount: Amount, Type: Fertiliser.Types.NO3N);
                }

                if (Wheat != null && Wheat.IsReadyForHarvesting)
                {
                    Wheat.Harvest();
                    Wheat.EndCrop();    
                }

            }
        }
    }
}
```
      CircularZone 0 to 5m: Radius=5; Width=5; Slope=0; AspectAngle=0; Altitude=50
        LocalMicroClimate
        MicroClimate: a_interception=0; b_interception=1; c_interception=0; d_interception=0; soil_albedo=0.3; SoilHeatFluxFraction=0.4; MinimumHeightDiffForNewLayer=0; NightInterceptionFraction=0.5; ReferenceHeight=2
        Report: EventNames=[Wheat].Harvesting
          VariableNames:
            [Clock].Today
            [Wheat].Phenology.CurrentStageName
            [Wheat].AboveGround.Wt
            [Wheat].AboveGround.N
            [Wheat].Grain.Protein
            [Wheat].Grain.Size
            [Wheat].Grain.Number
            [Wheat].Grain.Wt
            [Wheat].Grain.N
            [Wheat].Total.Wt
            [Zone].Area
            Parent.Distance as Distance
        Report DailyReport: EventNames=[Clock].DoReport
          VariableNames:
            [Clock].Today
            sum([Soil].SoilWater.SWmm) as TotalSWmm
            sum([Soil].Nutrient.NO3.kgha) as TotalNO3N
            sum([Soil].Nutrient.NH4.kgha) as TotalNH4N
            [Wheat].AboveGround.Wt
            [LocalMicroClimate].Wind
            [Wheat].Leaf.LAI
            [Wheat].Leaf.CoverGreen
        Fertiliser
        Soil: ASCOrder=Vertosol; ASCSubOrder=Black; SoilType=Clay; Site=Norwin; NearestTown=Norwin; Region=Darling Downs and Granite Belt; State=Queensland; Country=Australia; NaturalVegetation=Qld. Bluegrass, possible Qld. Blue gum; ApsoilNumber=900; Latitude=-27.581836; Longitude=151.320206; LocationAccuracy=+/- 20m
          DataSource=CSIRO Sustainable Ecosystems, Toowoomba; Characteriesd as part of the GRDC funded project"Doing it better, doing it smarter, managing soil water in Australian agriculture' 2011
          Comments=OC, CLL for all crops estimated-based on Bongeen Mywybilla Soil No1
          Physical
            Thickness  BD       AirDry    LL15      DUL       SAT       KS
            150        1.01056  0.13025   0.2605    0.521     0.588655  20
            150        1.07146  0.198689  0.248362  0.496723  0.565677  20
            300        1.09394  0.28      0.28      0.488438  0.557193  20
            300        1.15861  0.28      0.28      0.480297  0.532787  20
            300        1.17301  0.28      0.28      0.471584  0.527354  20
            300        1.16287  0.28      0.28      0.457071  0.53118   20
            300        1.1875   0.28      0.28      0.452332  0.521888  20
            SoilCrop WheatSoil: LL=[0.261, 0.248, 0.28, 0.306, 0.36, 0.392, 0.446]; KL=[0.06, 0.06, 0.06, 0.04, 0.04, 0.02, 0.01]; XF=[1, 1, 1, 1, 1, 1, 1]
          SoilWater: SummerDate=1-Nov; SummerU=5; SummerCona=5; WinterDate=1-Apr; WinterU=5; WinterCona=5; DiffusConst=40; DiffusSlope=16; Salb=0.12; CN2Bare=73; CNRed=20; CNCov=0.8; max_pond=0; Thickness=[150, 150, 300, 300, 300, 300, 300]; SWCON=[0.3, 0.3, 0.3, 0.3, 0.3, 0.3, 0.3]; PrecipitationInterception=0
          Organic: FOMCNRatio=40
            Thickness  Carbon  SoilCNRatio  FBiom  FInert  FOM
            150        1.2     12           0.04   0.4     347.129
            150        0.96    12           0.02   0.6     270.344
            300        0.6     12           0.02   0.8     163.972
            300        0.3     12           0.02   1       99.4541
            300        0.18    12           0.01   1       60.322
            300        0.12    12           0.01   1       36.5871
            300        0.12    12           0.01   1       22.1912
          Chemical
            Thickness  NO3N  NH4N  PH
            150        1     0.1   8
            150        1     0.1   8
            300        1     0.1   8
            300        1     0.1   8
            300        1     0.1   8
            300        1     0.1   8
            300        1     0.1   8
          InitialWater: PercentMethod=1; FractionFull=1
          Sample InitialN: Thickness=[150, 150, 300, 300, 300, 300, 300]; SWUnits=Volumetric; OCUnits=Total; PHUnits=Water
          CERESSoilTemperature
          Nutrient
            DirectedGraphInfo={Nodes=[{Name=Inert, OutlineColour=Black}, {Name=SurfaceResidue, OutlineColour=Black}, {Name=FOMLignin, OutlineColour=Black}, {Name=FOMCellulose, OutlineColour=Black}, {Name=FOMCarbohydrate, OutlineColour=Black}, {Name=Microbial, OutlineColour=Black}, {Name=Humic, OutlineColour=Black}, {Name=Urea, OutlineColour=Black}, {Name=NO3, OutlineColour=Black}, {Name=NH4, OutlineColour=Black}, {Name=Atmosphere, OutlineColour=White}], Arcs=[{SourceName=SurfaceResidue, DestinationName=Microbial}, {SourceName=SurfaceResidue, DestinationName=Humic}, {SourceName=FOMLignin, DestinationName=Microbial}, {SourceName=FOMLignin, DestinationName=Humic}, {SourceName=FOMCellulose, DestinationName=Microbial}, {SourceName=FOMCellulose, DestinationName=Humic}, {SourceName=FOMCarbohydrate, DestinationName=Microbial}, {SourceName=FOMCarbohydrate, DestinationName=Humic}, {SourceName=Microbial, DestinationName=Microbial}, {SourceName=Microbial, DestinationName=Humic}, {SourceName=Humic, DestinationName=Microbial}, {SourceName=Urea, DestinationName=NH4}, {SourceName=NO3, DestinationName=Atmosphere}, {SourceName=NH4, DestinationName=NO3}]}
        SurfaceOrganicMatter: InitialResidueName=wheat_stubble; InitialResidueType=wheat; InitialResidueMass=500; InitialStandingFraction=0; InitialCPR=0; InitialCNR=100; FractionFaecesAdded=1
        Plant Wheat: CropType=Wheat; IsAlive=false; IsEnding=false; DaysAfterEnding=0
      CircularZone 5 to 10m: Radius=10; Width=5; Slope=0; AspectAngle=0; Altitude=50
        LocalMicroClimate
        Report: EventNames=[Wheat].Harvesting
          VariableNames:
            [Clock].Today
            [Wheat].Phenology.CurrentStageName
            [Wheat].AboveGround.Wt
            [Wheat].AboveGround.N
            [Wheat].Grain.Protein
            [Wheat].Grain.Size
            [Wheat].Grain.Number
            [Wheat].Grain.Wt
            [Wheat].Grain.N
            [Wheat].Total.Wt
            [Zone].Area
            Parent.Distance as Distance
        Report DailyReport: EventNames=[Clock].DoReport
          VariableNames:
            [Clock].Today
            sum([Soil].SoilWater.SWmm) as TotalSWmm
            sum([Soil].Nutrient.NO3.kgha) as TotalNO3N
            sum([Soil].Nutrient.NH4.kgha) as TotalNH4N
            [Wheat].AboveGround.Wt
            [LocalMicroClimate].Wind
            [Wheat].Leaf.LAI
            [Wheat].Leaf.CoverGreen
        Fertiliser
        Soil: same as Single Tree Example.SingleTreeSystem.0 to 5m.Soil
        SurfaceOrganicMatter: InitialResidueName=wheat_stubble; InitialResidueType=wheat; InitialResidueMass=500; InitialStandingFraction=0; InitialCPR=0; InitialCNR=100; FractionFaecesAdded=1
        Plant Wheat: CropType=Wheat; IsAlive=false; IsEnding=false; DaysAfterEnding=0
        MicroClimate: a_interception=0; b_interception=1; c_interception=0; d_interception=0; soil_albedo=0.3; SoilHeatFluxFraction=0.4; MinimumHeightDiffForNewLayer=0; NightInterceptionFraction=0.5; ReferenceHeight=2
      CircularZone 10 to 15m: Radius=15; Width=5; Slope=0; AspectAngle=0; Altitude=50
        LocalMicroClimate
        Report: EventNames=[Wheat].Harvesting
          VariableNames:
            [Clock].Today
            [Wheat].Phenology.CurrentStageName
            [Wheat].AboveGround.Wt
            [Wheat].AboveGround.N
            [Wheat].Grain.Protein
            [Wheat].Grain.Size
            [Wheat].Grain.Number
            [Wheat].Grain.Wt
            [Wheat].Grain.N
            [Wheat].Total.Wt
            [Zone].Area
            Parent.Distance as Distance
        Report DailyReport: EventNames=[Clock].DoReport
          VariableNames:
            [Clock].Today
            sum([Soil].SoilWater.SWmm) as TotalSWmm
            sum([Soil].Nutrient.NO3.kgha) as TotalNO3N
            sum([Soil].Nutrient.NH4.kgha) as TotalNH4N
            [Wheat].AboveGround.Wt
            [LocalMicroClimate].Wind
            [Wheat].Leaf.LAI
            [Wheat].Leaf.CoverGreen
        Fertiliser
        Soil: same as Single Tree Example.SingleTreeSystem.0 to 5m.Soil
        SurfaceOrganicMatter: InitialResidueName=wheat_stubble; InitialResidueType=wheat; InitialResidueMass=500; InitialStandingFraction=0; InitialCPR=0; InitialCNR=100; FractionFaecesAdded=1
        Plant Wheat: CropType=Wheat; IsAlive=false; IsEnding=false; DaysAfterEnding=0
        MicroClimate: a_interception=0; b_interception=1; c_interception=0; d_interception=0; soil_albedo=0.3; SoilHeatFluxFraction=0.4; MinimumHeightDiffForNewLayer=0; NightInterceptionFraction=0.5; ReferenceHeight=2
      CircularZone 15 to 20m: Radius=20; Width=5; Slope=0; AspectAngle=0; Altitude=50
        LocalMicroClimate
        MicroClimate: a_interception=0; b_interception=1; c_interception=0; d_interception=0; soil_albedo=0.3; SoilHeatFluxFraction=0.4; MinimumHeightDiffForNewLayer=0; NightInterceptionFraction=0.5; ReferenceHeight=2
        Report: EventNames=[Wheat].Harvesting
          VariableNames:
            [Clock].Today
            [Wheat].Phenology.CurrentStageName
            [Wheat].AboveGround.Wt
            [Wheat].AboveGround.N
            [Wheat].Grain.Protein
            [Wheat].Grain.Size
            [Wheat].Grain.Number
            [Wheat].Grain.Wt
            [Wheat].Grain.N
            [Wheat].Total.Wt
            [Zone].Area
            Parent.Distance as Distance
        Report DailyReport: EventNames=[Clock].DoReport
          VariableNames:
            [Clock].Today
            sum([Soil].SoilWater.SWmm) as TotalSWmm
            sum([Soil].Nutrient.NO3.kgha) as TotalNO3N
            sum([Soil].Nutrient.NH4.kgha) as TotalNH4N
            [Wheat].AboveGround.Wt
            [LocalMicroClimate].Wind
            [Wheat].Leaf.LAI
            [Wheat].Leaf.CoverGreen
        Fertiliser
        Soil: same as Single Tree Example.SingleTreeSystem.0 to 5m.Soil
        SurfaceOrganicMatter: InitialResidueName=wheat_stubble; InitialResidueType=wheat; InitialResidueMass=500; InitialStandingFraction=0; InitialCPR=0; InitialCNR=100; FractionFaecesAdded=1
        Plant Wheat: CropType=Wheat; IsAlive=false; IsEnding=false; DaysAfterEnding=0
      CircularZone 20 to 25m: Radius=25; Width=5; Slope=0; AspectAngle=0; Altitude=50
        LocalMicroClimate
        MicroClimate: a_interception=0; b_interception=1; c_interception=0; d_interception=0; soil_albedo=0.3; SoilHeatFluxFraction=0.4; MinimumHeightDiffForNewLayer=0; NightInterceptionFraction=0.5; ReferenceHeight=2
        Report: EventNames=[Wheat].Harvesting
          VariableNames:
            [Clock].Today
            [Wheat].Phenology.CurrentStageName
            [Wheat].AboveGround.Wt
            [Wheat].AboveGround.N
            [Wheat].Grain.Protein
            [Wheat].Grain.Size
            [Wheat].Grain.Number
            [Wheat].Grain.Wt
            [Wheat].Grain.N
            [Wheat].Total.Wt
            [Zone].Area
            Parent.Distance as Distance
        Report DailyReport: EventNames=[Clock].DoReport
          VariableNames:
            [Clock].Today
            sum([Soil].SoilWater.SWmm) as TotalSWmm
            sum([Soil].Nutrient.NO3.kgha) as TotalNO3N
            sum([Soil].Nutrient.NH4.kgha) as TotalNH4N
            [Wheat].AboveGround.Wt
            [LocalMicroClimate].Wind
            [Wheat].Leaf.LAI
            [Wheat].Leaf.CoverGreen
        Fertiliser
        Soil: same as Single Tree Example.SingleTreeSystem.0 to 5m.Soil
        SurfaceOrganicMatter: InitialResidueName=wheat_stubble; InitialResidueType=wheat; InitialResidueMass=500; InitialStandingFraction=0; InitialCPR=0; InitialCNR=100; FractionFaecesAdded=1
        Plant Wheat: CropType=Wheat; IsAlive=false; IsEnding=false; DaysAfterEnding=0
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