Simulations: Version=57
  Simulation
    Clock: StartDate=1900-01-01; EndDate=2000-12-31
    Summary SummaryFile
    Weather: FileName=%root%\Examples\WeatherFiles\Dalby.met
    SoilArbitrator
    Zone Field: Area=1; Slope=0
      Report: EventNames=[Barley].Harvesting
        VariableNames:
          [Clock].Today
          [Barley].Phenology.Zadok.Stage
          [Barley].Phenology.CurrentStageName
          [Barley].AboveGround.Wt
          [Barley].AboveGround.N
          [Barley].Grain.Total.Wt*10 as Yield
          [Barley].Grain.Protein
          [Barley].Grain.Size
          [Barley].Grain.Number
          [Barley].Grain.Total.Wt
          [Barley].Grain.Total.N
          [Barley].Total.Wt
      Fertiliser
      Soil: ASCOrder=Vertosol; ASCSubOrder=Black; SoilType=Clay; Site=Norwin; NearestTown=Norwin; Region=Darling Downs and Granite Belt; State=Queensland; Country=Australia; NaturalVegetation=Qld. Bluegrass, possible Qld. Blue gum; ApsoilNumber=900; Latitude=-27.581836; Longitude=151.320206; LocationAccuracy=+/- 20m
        DataSource=CSIRO Sustainable Ecosystems, Toowoomba; Characteriesd as part of the GRDC funded project"Doing it better, doing it smarter, managing soil water in Australian agriculture' 2011
        Comments=OC, CLL for all crops estimated-based on Bongeen Mywybilla Soil No1
        Water
          Thickness  BD       AirDry    LL15      DUL       SAT       KS
          150        1.01056  0.13025   0.2605    0.521     0.588655  20
          150        1.07146  0.198689  0.248362  0.496723  0.565677  20
          300        1.09394  0.28      0.28      0.488438  0.557193  20
          300        1.15861  0.28      0.28      0.480297  0.532787  20
          300        1.17301  0.28      0.28      0.471584  0.527354  20
          300        1.16287  0.28      0.28      0.457071  0.53118   20
          300        1.1875   0.28      0.28      0.452332  0.521888  20
          SoilCrop BarleySoil: LL=[0.261, 0.248, 0.28, 0.306, 0.36, 0.392, 0.446]; KL=[0.06, 0.06, 0.06, 0.04, 0.04, 0.02, 0.01]; XF=[1, 1, 1, 1, 1, 1, 1]
        SoilWater: SummerDate=1-Nov; SummerU=5; SummerCona=5; WinterDate=1-Apr; WinterU=5; WinterCona=5; DiffusConst=40; DiffusSlope=16; Salb=0.12; CN2Bare=73; CNRed=20; CNCov=0.8; max_pond=0; Thickness=[150, 150, 300, 300, 300, 300, 300]; SWCON=[0.3, 0.3, 0.3, 0.3, 0.3, 0.3, 0.3]; ResidueInterception=0
        SoilOrganicMatter: RootCN=40; EnrACoeff=7.4; EnrBCoeff=0.2; OCUnits=Total
          Thickness  OC    SoilCN  FBiom  FInert  RootWt
          150        1.2   12      0.04   0.4     347.129
          150        0.96  12      0.02   0.6     270.344
          300        0.6   12      0.02   0.8     163.972
          300        0.3   12      0.02   1       99.4541
          300        0.18  12      0.01   1       60.322
          300        0.12  12      0.01   1       36.5871
          300        0.12  12      0.01   1       22.1912
        Analysis: Thickness=[150, 150, 300, 300, 300, 300, 300]; PH=[8, 8, 8, 8, 8, 8, 8]; PHUnits=Water; BoronUnits=0
        InitialWater: PercentMethod=1; FractionFull=1
        Sample InitialN: NO3Units=ppm; NH4Units=ppm; SWUnits=Volumetric; OCUnits=Total; PHUnits=Water
          Thickness  NO3  NH4
          150        1    0.1
          150        1    0.1
          300        1    0.1
          300        1    0.1
          300        1    0.1
          300        1    0.1
          300        1    0.1
        CERESSoilTemperature
        Nutrient
          DirectedGraphInfo={Nodes=[{Name=Inert, OutlineColour=Black}, {Name=SurfaceResidue, OutlineColour=Black}, {Name=FOMLignin, OutlineColour=Black}, {Name=FOMCellulose, OutlineColour=Black}, {Name=FOMCarbohydrate, OutlineColour=Black}, {Name=Microbial, OutlineColour=Black}, {Name=Humic, OutlineColour=Black}, {Name=Urea, OutlineColour=Black}, {Name=NO3, OutlineColour=Black}, {Name=NH4, OutlineColour=Black}, {Name=Atmosphere, OutlineColour=White}, {Name=PlantAvailableNO3, OutlineColour=Black}, {Name=PlantAvailableNH4, OutlineColour=Black}], Arcs=[{SourceName=SurfaceResidue, DestinationName=Microbial}, {SourceName=SurfaceResidue, DestinationName=Humic}, {SourceName=FOMLignin, DestinationName=Microbial}, {SourceName=FOMLignin, DestinationName=Humic}, {SourceName=FOMCellulose, DestinationName=Microbial}, {SourceName=FOMCellulose, DestinationName=Humic}, {SourceName=FOMCarbohydrate, DestinationName=Microbial}, {SourceName=FOMCarbohydrate, DestinationName=Humic}, {SourceName=Microbial, DestinationName=Microbial}, {SourceName=Microbial, DestinationName=Humic}, {SourceName=Humic, DestinationName=Microbial}, {SourceName=Urea, DestinationName=NH4}, {SourceName=NO3, DestinationName=Atmosphere}, {SourceName=NH4, DestinationName=NO3}]}
      SurfaceOrganicMatter: InitialResidueName=wheat_stubble; InitialResidueType=wheat; InitialResidueMass=500; InitialStandingFraction=0; InitialCPR=0; InitialCNR=100; FractionFaecesAdded=0.5
      MicroClimate: a_interception=0; b_interception=1; c_interception=0; d_interception=0; soil_albedo=0.3; SoilHeatFluxFraction=0.4; NightInterceptionFraction=0.5; ReferenceHeight=2
      Manager SowingFertiliser
        Amount = 160
        CropName = wheat
```csharp
using System;
using Models.Core;
using Models.PMF;
namespace Models
{
    [Serializable]
    public class Script : Model
    {
        [Link] Clock Clock;
        [Link] Fertiliser Fertiliser;
        [Link] Summary Summary;
        
        
        [Description("Amount of fertiliser to be applied (kg/ha)")]
        public double Amount { get; set;}
        
        [Description("Crop to be fertilised")]
        public string CropName { get; set;}
        
        
        

        [EventSubscribe("Sowing")]
        private void OnSowing(object sender, EventArgs e)
        {
            Model crop = sender as Model;
            if (crop.Name.ToLower()==CropName.ToLower())
                Fertiliser.Apply(Amount: Amount, Type: Fertiliser.Types.NO3N);
        }
        
    }
}
```
      Manager Harvest
```csharp
using System;
using Models.Core;
using Models.PMF;
using Models.Soils;
using Models.Soils.Nutrients;
using Models.Utilities;
using APSIM.Shared.Utilities;

namespace Models
{
    [Serializable]
    public class Script : Model
    {
        [Link] Plant Wheat;

        [EventSubscribe("DoManagement")]
        private void OnDoManagement(object sender, EventArgs e)
        {
            if (Wheat.IsReadyForHarvesting)
            {
               Wheat.Harvest();
               Wheat.EndCrop();    
            }
        
        }
        
    }
}
```
      Plant Barley: CropType=Barley; IsEnding=false; DaysAfterEnding=0
      Manager Sow on a fixed date
        Crop = .Simulations.Simulation.Field.Barley
        SowDate = 24-Jul
        CultivarName = Dash
        SowingDepth = 50
        RowSpacing = 750
        Population = 6
```csharp
using System;
using Models.Core;
using Models.PMF;
using Models.Soils;
using Models.Soils.Nutrients;
using Models.Utilities;
using APSIM.Shared.Utilities;

namespace Models
{
    [Serializable]
    public class Script : Model
    {
        [Link] Clock Clock;
        [Link] Fertiliser Fertiliser;
        [Link] Summary Summary;
        [Link] Soil Soil;
        Accumulator accumulatedRain;
        
        [Description("Crop")]
        public IPlant Crop { get; set; }
        [Description("Sowing date (d-mmm)")]
        public string SowDate { get; set; }
    [Display(Type = DisplayType.CultivarName, PlantName = "Barley")]
        [Description("Cultivar to be sown")]
        public string CultivarName { get; set; }
        [Description("Sowing depth (mm)")]
        public double SowingDepth { get; set; }
        [Description("Row spacing (mm)")]
        public double RowSpacing { get; set; }
        [Description("Plant population (/m2)")]
        public double Population { get; set; }
        


        [EventSubscribe("DoManagement")]
        private void OnDoManagement(object sender, EventArgs e)
        {
            if (DateUtilities.WithinDates(SowDate, Clock.Today, SowDate))
            {
                Crop.Sow(population: Population, cultivar: CultivarName, depth: SowingDepth, rowSpacing: RowSpacing);    
            }
        
        }
        
    }
}
```
  DataStore
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