Simulations: Version=217
  DataStore
  Folder Grazing example
    Memo Grazing example description
      # CLEM Grazing simulation example
      ## Graze 10 Ruminants on native pasture and feeding hay

      It is recommended that you use these simulations as examples, but build your simulation from scratch to best understand the processes included.

      # Help
      The CLEM help system provides a model overview, user guide (how to) and a full description of every CLEM component, as well as in depth discussions on modelling various farm systems and what components to use. The Help documentation can be accessed by clicking the Help button beside the component name in the right hand information pane after selecting any CLEM component from your simulation tree or at [CLEM Help online](http://www.apsim.info/CLEM/Content/Home.htm).
    Simulation Grazing
      Memo Grazing 10Animals_PastureHay
        # Grazing
        - simulated for 14 years - with 10 ruminants on native pasture and feeding hay

        ## Native Pasture
        - Native Pasture yield data - from an external dataset (from a Grass growth model) using the "Simple" method with data provided in csv file
        - Native Pasture is managed - land assigned, tracking pasture state
        ## Hay purchased
         - 100kg Hay purchased as needed
        ## Ruminants
        - 10 Ruminants (different Starting Ages and Weights)
        - Moved to Native Pasture at start of simulation
        - Ruminants grazed on Pasture for the maximum 8 hours each day
        - Fed purchased hay after grazing to fill any shortfall to potential intake
        - Breeding by Controlled mating - every 12 months from March
        - Weaning - Individuals are weaned at 8 months or 100 kg - every 6 months from April
        - Manage numbers: every August
         - Breeding females: maintained between 2 and 10 - sold when over 180 months old - A maximum of 100% of the Maximum Breeders Kept can be purchased in a single transaction
         - Breeding males (sires/rams etc): A maximum of 2 will be kept - sold when over 96 months old
         - General herd: Males will be sold when 18 months old or 150 kg - Animals will be sold only when activity is due - Purchased individuals will be placed on Native Pasture
        - Buy and sell
         - Finances goes in and out of the General account
      Clock: Start=1970-01-01; End=1993-12-31
        CLEMEvents: TimeStep=30; CustomTimeStep=0; EcologicalIndicatorsCalculationInterval=12; EcologicalIndicatorsCalculationMonth=7
      Summary summaryfile
      RandomNumberGenerator RandomNumbers: Seed=0
      ZoneCLEM CLEM: UserType=0; FarmMultiplier=1; DescriptiveSummaryFormatStyle=0; BuildTransactionCategoryFromTree=false; UseModelNameAsTransactionCategory=false; Area=0; Slope=0; AspectAngle=0; Altitude=50
        FileCrop FileForage: FileName=FileForage.prn; CropNameColumnName=CropName; SoilTypeColumnName=SoilNum; YearColumnName=Year; MonthColumnName=Month; AmountColumnName=AmtKg
        ResourcesHolder Resources
          Land: UnitsOfArea=hectares; UnitsOfAreaToHaConversion=1
            LandType Paddock1: LandArea=250; PortionBuildings=0; ProportionOfTotalArea=1; SoilType=2
          Finance Finances: FirstMonthOfFinancialYear=7
            FinanceType General account: OpeningBalance=100000; EnforceWithdrawalLimit=false; WithdrawalLimit=0; InterestRateCharged=7.5; InterestRatePaid=2
          RuminantHerd Ruminants: TransactionStyle=0
            RuminantType Bos indicus
              RuminantParametersHolder Parameters1: DisplaySummaryParameters=true
                RuminantParametersBreeding Breeding: OestrusCycleLength=20; DaysInHeat=2; ProportionOffspringMale=0.5; DaysLastBirthToStartOestrus=20; MaximumMaleMatingsPerDay=30; AllowFreemartins=false; ConceptionDuringLactationProbability=1; DystociaCoefficients=[0, 0]
                RuminantParametersGeneral General: Breed=Bos taurus; NaturalWeaningAge={Parts=[0]}; MinimumSizeForMaturityFemale=0.6; MinimumSizeForMaturityMale=0.6; GestationLength={Parts=[0, 9, 0]}; MultipleBirthRate=[0]; SRWFemale=460; SRWCastrateMaleMultiplier=1.2; SRWMaleMultiplier=1.4; BirthScalar=[0.07, 0.07]; EffectRelativeSizeBirthWeight_CP4=0.33; BaseAnimalEquivalent=450; RelBCToScoreRate=0.15; BCScoreRange=[0, 3, 5]; ProportionEBWFatFemale=0.25; ProportionEBWFatMale=0.25; ProportionEBWFatMax=0.45; GutFillMinimum=0.04; AgeGrowthRateCoefficientProvisionStyle=0; AgeGrowthRateCoefficient_CN1=0.015; CN1EstimatedWeaningWeight=0; CN1EstimatedWeaningAge={Parts=[0]}; SRWGrowthScalar_CN2=0.27; SlowGrowthFactor_CN3=0.4; MJEnergyPerKgFat=39.3; MJEnergyPerKgProtein=23.6; IncludeWool=false
                RuminantParametersGrazing Grazing: GreenDietMax=0.98; GreenDietCoefficient=0.15; GreenDietZero=0.04; IntakeCoefficientBiomass=0.01; StrictFeedingLimits=true
                RuminantParametersGrow GrowParams: MortalityBase=0.03; GrowthEnergyIntercept1=6.7; GrowthEnergyIntercept2=20.3; EMaintEfficiencyCoefficient=0.368; EMaintEfficiencyIntercept=0.503; EGrowthEfficiencyCoefficient=0.79; EGrowthEfficiencyIntercept=0; ELactationEfficiencyCoefficient=0.35; ELactationEfficiencyIntercept=0.42; EMaintExponent=8.2e-05; EMaintIntercept=0.09; EMaintCoefficient=0.26; EnergyMaintenanceMaximumAge={Parts=[6, 0, 0]}; Kme=1.2; GrowthEfficiency=1; IntakeCoefficient=0.02425; IntakeIntercept=1.7; ProteinCoefficient=130; ProteinDegradability=0.9; MilkIntakeCoefficient=0.1206; MilkIntakeIntercept=3.8146; MilkIntakeMaximum=20; MilkLWTFodderSubstitutionProportion=0.2; MaxJuvenileIntake=0.03; ProportionalDiscountDueToMilk=0.3; WoolCoefficient=0; CashmereCoefficient=0; LactatingPotentialModifierConstantA=0.32; LactatingPotentialModifierConstantB=61; LactatingPotentialModifierConstantC=1.7
                RuminantParametersGrowPF GrowPFParams
                  RuminantParametersGrowPFCACRD CACRD: RumenDegradabilityIntercept_CRD1=0.3; RumenDegradabilitySlope_CRD2=0.25; RumenDegradabilityConcentrateSlope_CRD3=0.1; RumenDegradableProteinIntercept_CRD4=0.007; RumenDegradableProteinSlope_CRD5=0.005; RumenDegradableProteinExponent_CRD6=0.35; ProteinShortfallAlleviationScalar=0.5; MilkProteinDigestibility_CA5=0.92; MicrobialProteinDigestibility_CA7=0.6; FaecalProteinFromMCP_CA8=0.25
                  RuminantParametersGrowPFCD CD: BasalMortalityRate_CD1=5.53e-05; EffectBCOnMortality1_CD2=0.3; EffectBCOnMortality2_CD3=0.6; CriticalFatToEBMForSurvival=0.05; RelativeDifferenceWeightDyingIndividuals_CD12=0.1; UpperLimitForMortalityInWeaners_CD13=0.0001
                  RuminantParametersGrowPFCG CG: EfficiencyOfDPLSUseForWool_CG1=0.6; EfficiencyOfDPLSUseFromFeed_CG2=0.7; EfficiencyOfDPLSUseFromMilk_CG3=0.8; GainCurvature_CG4=6; GainMidpoint_CG5=0.4; ConditionNoEffect_CG6=0.9; ConditionMaxEffect_CG7=0.97; GrowthEnergyIntercept1_CG8b=6.7; GrowthEnergyIntercept2_CG9=16.5; GrowthEnergySlope1_CG10=2; GrowthEnergySlope2_CG11=13.8; ProteinGainIntercept1_CG12b=0.21; ProteinGainIntercept2_CG13=0.12; ProteinGainSlope1_CG14b=0.004; ProteinGainSlope2_CG15=0.115; BreedGrowthEfficiencyScalar=1; BreedLactationEfficiencyScalar=1; BreedMainenanceEfficiencyScalar=1; ProteinContentOfFatFreeTissueGainWetBasis=0.21; ProteinContentOfFatFreeTissueGainWetBasisAtBirth=0.1373; DaysUntilStandardProteinContentOfFatFreeTissueGainWetBasis=30; DietaryProteinEnergyReleaseEfficiency=0.5; DietaryProteinEnergyReleaseEfficiencyWhenNetEnergyDeficit=0.8; FatPercentToProportionEDeficitTakenFromBodyFatIntercept=0.875; FatPercentToProportionEDeficitTakenFromBodyFatSlope=0.033
                  RuminantParametersGrowPFCI CI: IntakeReductionFromInsufficientRDPIntake=0.5; IgnoreFeedQualityIntakeAdjustment=true; RelativeSizeScalar_CI1=0.025; RelativeSizeQuadratic_CI2=1.7; RumenDevelopmentCurvature_CI3=0.22; RumenDevelopmentAge_CI4=60; PeakLactationIntakeDay_CI8=62; LactationResponseCurvature_CI9=1.7; EffectLevelsMilkProdOnIntake_CI10=0.6; BasalMilkRelSRW_CI11=0.05; LactationConditionLossAdjustment_CI12=0.15; LactationConditionLossThreshold_CI13=0.005; LactationConditionLossThresholdDecay_CI14=0.002; ConditionAtParturitionAdjustment_CI15=0.5; PeakLactationIntakeLevel_CI19=[0.416, 0.416]; RelativeConditionEffect_CI20=1.5; DigestibilityPeak_CR1=0.8; DigestibilitySlope_CR3=1.25; QualityIntakeSubsititutionFactorNonLactating_CR11=10.5; QualityIntakeSubsititutionFactorLactating_CR20=11.5; MethaneEmissionsParameter1=0.0184; MethaneEmissionsParameter2=13; MethaneEmissionsParameter3=7.52; MethaneEmissionsParameter4=23.7; MethaneEmissionsParameter5=3.36
                  RuminantParametersGrowPFCKCL CKCL: ELactationEfficiencyIntercept_CK5=0.4; ELactationEfficiencyCoefficient_CK6=0.02; ExpectedPeakYield=20; PeakYieldScalar_CL0=[0.375, 0.375]; MetabolisabilityOfMilk_CL5=0.94; EnergyContentMilk_CL6=3.1; LactationEnergyDeficit_CL7=1.17; MilkConsumptionLimit1_CL12=0.42; MilkConsumptionLimit2_CL13=0.58; MilkConsumptionLimit3_CL14=0.036; ProteinPercentMilk_CL15=3.2; AdjustmentOfPotentialYieldReduction_CL16=0.7; PotentialYieldReduction_CL17=0.01; PotentialYieldReduction2_CL18=0.1; PotentialLactationYieldParameter_CL19=1.6; PotentialYieldMEIEffect_CL20=4; PotentialYieldLactationEffect_CL21=0.004; PotentialYieldLactationEffect2_CL22=0.006; PotentialYieldConditionEffect_CL23=3; PotentialYieldConditionEffect2_CL24=0.6
                  RuminantParametersGrowPFCM CM: HPVisceraFL_CM1=0.09; FHPScalar_CM2=0.31; MainExponentForAge_CM3=8e-05; AgeEffectMin_CM4=0.84; MilkScalar_CM5=0.23; GrazingEnergyFromMetabolicScalar_CM6=0.0025; EFPFromMilkDiet_CM11=0.000526; BreedEUPFactor1_CM12=0.012; BreedEUPFactor2_CM13=0.0338; DermalLoss_CM14=0.00011
                  RuminantParametersGrowPFCP CP: FetalNormWeightParameter_CP2=2.2; FetalNormWeightParameter2_CP3=1.77; EffectFetalRelativeSizeOnBirthWeight_CP4=0.33; ConceptusWeightRatio_CP5=1.8; ConceptusWeightParameter_CP6=2.42; ConceptusWeightParameter2_CP7=1.16; ConceptusEnergyContent_CP8=4.11; ConceptusEnergyParameter_CP9=343.5; ConceptusEnergyParameter2_CP10=0.0164; ConceptusProteinContent_CP11=0.134; ConceptusProteinParameter_CP12=6.22; ConceptusProteinParameter2_CP13=0.747; FetalGrowthPoorCondition_CP14=[1, 1.15]; ToxaemiaCoefficients=[0, 0]
                RuminantParametersGrowMortality Mortality: MortalityCoefficient=2.5; MortalityIntercept=0.05; MortalityExponent=3; JuvenileMortalityCoefficient=3; JuvenileMortalityMaximum=0.2; JuvenileMortalityExponent=1.8
                RuminantParametersLactation: MilkingDays=300; MilkPeakYield=4; MilkCurveSuckling_CL3=0.6; MilkCurveNonSuckling_CL4=0.11; MilkOffsetDay=4; MilkPeakDay=30
              RuminantInitialCohorts Initial cohorts: WeightWarningOccurred=true; ManagedPastureName=Not specified
                RuminantTypeCohort WeanerF: Sex=0; AgeDetails={Parts=[0, 8, 0]}; AgeSD=0; Number=2; Weight=180; WeightSD=0; InitialFatProteinStyle=4; Suckling=false; Sire=false; ProportionFleecePresent=0; ManagedPastureName=Not specified
                RuminantTypeCohort WeanerM: Sex=1; AgeDetails={Parts=[0, 8, 0]}; AgeSD=0; Number=2; Weight=180; WeightSD=0; InitialFatProteinStyle=4; Suckling=false; Sire=false; ProportionFleecePresent=0; ManagedPastureName=Not specified
                RuminantTypeCohort Female3_4: Sex=0; AgeDetails={Parts=[3, 1, 0]}; AgeSD=0; Number=4; Weight=400; WeightSD=0; InitialFatProteinStyle=4; Suckling=false; Sire=false; ProportionFleecePresent=0; ManagedPastureName=Not specified
                RuminantTypeCohort Male2_3: Sex=1; AgeDetails={Parts=[2, 6, 0]}; AgeSD=0; Number=1; Weight=520; WeightSD=0; InitialFatProteinStyle=4; Suckling=false; Sire=false; ProportionFleecePresent=0; ManagedPastureName=Not specified
                RuminantTypeCohort Male3_4: Sex=1; AgeDetails={Parts=[3, 6, 0]}; AgeSD=0; Number=1; Weight=610; WeightSD=0; InitialFatProteinStyle=4; Suckling=false; Sire=true; ProportionFleecePresent=0; ManagedPastureName=Not specified
              RuminantConceptionByCondition ConceptionByCondition: ConditionBasedConceptionStyle=1; ConditionBasedConceptionCutOff=0.85; ConditionBasedConceptionProbability=1
              AnimalPricing Prices
                AnimalPriceGroup Weaners_LT_12m: PricingStyle=1; Value=2.5; PurchaseOrSale=0; RandomiseBeforeSorting=false
                  FilterByProperty LT_12m: PropertyOfIndividual=AgeInYears; Operator=20; Value=1
                AnimalPriceGroup Female1_3_Buy: PricingStyle=1; Value=2.3; PurchaseOrSale=1; RandomiseBeforeSorting=false
                  FilterByProperty Female: PropertyOfIndividual=Sex; Operator=13; Value=Female
                  FilterByProperty less36months: PropertyOfIndividual=AgeInYears; Operator=20; Value=3
                AnimalPriceGroup Female1_3_Sell: PricingStyle=1; Value=2.5; PurchaseOrSale=2; RandomiseBeforeSorting=false
                  FilterByProperty Female: PropertyOfIndividual=Sex; Operator=13; Value=Female
                  FilterByProperty less36months: PropertyOfIndividual=AgeInYears; Operator=20; Value=3
                AnimalPriceGroup Female 3plus: PricingStyle=1; Value=2.2; PurchaseOrSale=0; RandomiseBeforeSorting=false
                  FilterByProperty Female: PropertyOfIndividual=Sex; Operator=13; Value=Female
                  FilterByProperty 36months: PropertyOfIndividual=AgeInYears; Operator=16; Value=3
                AnimalPriceGroup Breeding Sires: PricingStyle=1; Value=2.2; PurchaseOrSale=0; RandomiseBeforeSorting=false
                  FilterByProperty isSire: PropertyOfIndividual=Male.IsSire; Operator=83
                AnimalPriceGroup Male1_3: PricingStyle=1; Value=2.5; PurchaseOrSale=0; RandomiseBeforeSorting=false
                  FilterByProperty Male: PropertyOfIndividual=Sex; Operator=13; Value=Male
                  FilterByProperty less36months: PropertyOfIndividual=AgeInYears; Operator=20; Value=3
                AnimalPriceGroup Male 3plus: PricingStyle=1; Value=2.4; PurchaseOrSale=0; RandomiseBeforeSorting=false
                  FilterByProperty Male: PropertyOfIndividual=Sex; Operator=13; Value=Male
                  FilterByProperty 36months: PropertyOfIndividual=AgeInYears; Operator=16; Value=3
          GrazeFoodStore
            GrazeFoodStoreType NativePasture: TypeOfFeed=4; GrossEnergyContent=18.4; MetabolisableEnergyContent=8; NitrogenPercent=0; GreenNitrogenPercent=2; DecayNitrogen=0.35; MinimumNitrogen=0.4; RumenDegradableProteinPercent=58; DMDStyle=1; DryMatterDigestibility=0; GreenDMD=58; NToDMDCoefficient=11.03; NToDMDIntercept=41.4; DecayDMD=0.1; MinimumDMD=43; DetachRate=0.03; CarryoverDetachRate=0.12; AcidDetergentInsolubleProtein=0.0798; CrudeProteinPercent=0; FatPercent=1.9; GutFillHighQuality=0.08; GutFillLowQuality=0.2; IntakeTropicalQualityCoefficient=0.16; IntakeQualityCoefficient=1.7; StartingAmount=2000; FirstMonthOfGrowSeason=11; LastMonthOfGrowSeason=3; NumberMonthsForInitialBiomass=5
          AnimalFoodStore
            AnimalFoodStoreType Hay: TypeOfFeed=1; GrossEnergyContent=18.4; MetabolisableEnergyContent=6.1; FatPercent=1.2; DryMatterDigestibility=44.7; CPContentStyle=0; UserNitrogenPercent=0; UserCrudeProteinPercent=8.8; GutFill=0.08; CrudeProteinPercent=0; NitrogenPercent=0; RumenDegradableProteinPercent=70; AcidDetergentInsolubleProtein=0.057; StartingAmount=500; Notes=Rhodes grass hay ex Kunnanura, WA (JD)
              Transmutation Purchase: TransmutationPacketSize=1000; UseWholePackets=false; TransactionCategory=Transmutation
                Transmute: TransmuteResourceTypeName=Finances.General account; AmountPerPacket=100; TransmuteStyle=0; FinanceTypeForTransactionsName=No transactions
        ActivitiesHolder Activities
          CropActivityManageCrop Native Pasture on farm: LandItemNameToUse=Land.Paddock1; AreaRequested=250; UseAreaAvailable=false; TransactionCategory=Crop; OnPartialResourcesAvailableAction=0
            CropActivityManageProduct Native Pasture to GrazeFoodStore: ModelNameFileCrop=FileForage; CropName=Native; StoreItemName=GrazeFoodStore.NativePasture; AddProductStyle=0; ProportionKept=1; PlantedMultiplier=1; TreesPerHa=0; TransactionCategory=Crop.[Product]; OnPartialResourcesAvailableAction=0
          ActivityFolder Manage herd: OnPartialResourcesAvailableAction=0
            RuminantActivityGrow Grow all ruminants: EnergyGross=18.4; OnPartialResourcesAvailableAction=0; TransactionCategory=Livestock.Manage
            RuminantActivityMove Move to pasture: ManagedPastureName=GrazeFoodStore.NativePasture; PerformAtStartOfSimulation=true; MoveSucklings=false; TimeStepTiming=2; TransactionCategory=Livestock.Manage; OnPartialResourcesAvailableAction=0
              RuminantGroup All: RandomiseBeforeSorting=false
            RuminantActivityGrazeAll Graze all: HoursGrazed=8; TransactionCategory=Livestock.Grazing; OnPartialResourcesAvailableAction=2
            RuminantActivityFeed Feed hay: FeedTypeName=AnimalFoodStore.Hay; ProportionTramplingWastage=0; FeedStyle=4; StopFeedingWhenSatisfied=false; ForceFeed=false; TransactionCategory=Livestock.Feed; OnPartialResourcesAvailableAction=2
              RuminantFeedGroup Feed all: Value=1; Measure=Feed provided; FeedToSatisfy=0; TransactionCategory=Feed.[Product].[Ruminants]; RandomiseBeforeSorting=false
            RuminantActivityBreed Breed: InferStartupPregnancy=false; TransactionCategory=Livestock.Manage; OnPartialResourcesAvailableAction=0
              RuminantActivityControlledMating ControlledMating: MaximumAgeMating={Parts=[10, 0, 0]}; JoiningsPerMale=1; TransactionCategory=Livestock.Manage; OnPartialResourcesAvailableAction=0
                ActivityTimerCalendar Controlled mating: StartDetails={Parts=[0, 3, 0]}; EndDetails={Parts=[0, 3, 0]}; RepeatInterval={Parts=[1, 0, 0]}; WholeTimeStepMustBeInRange=false; Invert=false
            RuminantActivityWean Wean: Style=0; WeaningAge={Parts=[0, 8, 0]}; WeaningWeight=100; GrazeFoodStoreName=GrazeFoodStore.NativePasture; TransactionCategory=Livestock.Manage; OnPartialResourcesAvailableAction=0
              ActivityTimerCalendar Weaning: StartDetails={Parts=[0, 4, 0]}; EndDetails={Parts=[0, 4, 0]}; RepeatInterval={Parts=[1, 0, 0]}; WholeTimeStepMustBeInRange=false; Invert=false
              RuminantGroup All: RandomiseBeforeSorting=false
            RuminantActivityManage Manage numbers: ManageFemaleBreederNumbers=true; PerformFemaleDestocking=true; PerformFemaleStocking=true; PerformMaleDestocking=true; PerformMaleStocking=true; MaximumBreedersKept=10; MinimumBreedersKept=2; MaxBreedersMultiplierToStop=2; MarkOldBreedersForSale=true; MaximumBreederAge={Parts=[10, 0, 0]}; MaximumProportionBreedersPerPurchase=1; ReturnPregnantMaxAgeToHerd=false; RetainFemaleReplacementBreedersFromSaleHerd=true; ManageMaleBreederNumbers=true; MaximumSiresKept=1; MarkOldSiresForSale=true; MaximumSireAge={Parts=[8, 0, 0]}; AllowSireReplacement=false; RestockSiresRelativeToBreeders=false; MaximumSiresPerPurchase=1; RetainMaleReplacementBreedersFromSaleHerd=true; GrowOutYoungMales=true; ContinuousGrowOutSales=false; MarkAgeWeightMalesForSale=true; CastrateMales=true; MaleSellingAge={Parts=[1, 6, 0]}; MaleSellingWeight=350; GrowOutYoungFemales=false; FemaleSellingAge={Parts=[2, 0, 0]}; FemaleSellingWeight=300; MarkAgeWeightFemalesForSale=false; GrazeFoodStoreNameSires=GrazeFoodStore.NativePasture; GrazeFoodStoreNameBreeders=GrazeFoodStore.NativePasture; GrazeFoodStoreNameGrowOutFemales=GrazeFoodStore.NativePasture; GrazeFoodStoreNameGrowOutMales=GrazeFoodStore.NativePasture; MinimumPastureBeforeRestock=1500; AdjustBreedingFemalesAtStartup=false; AdjustOthersToFemaleBreedersPropAtStartup=false; AdjustBreedingMalesAtStartup=false; TransactionCategory=Livestock.Manage; OnPartialResourcesAvailableAction=0
              ActivityTimerCalendar every August: StartDetails={Parts=[0, 8, 0]}; EndDetails={Parts=[0, 8, 0]}; RepeatInterval={Parts=[1, 0, 0]}; WholeTimeStepMustBeInRange=false; Invert=false
              SpecifyRuminant Breeders: RuminantTypeName=Ruminants.Bos indicus; Proportion=1
                RuminantTypeCohort 24mth breeder: Sex=0; AgeDetails={Parts=[2, 0, 0]}; AgeSD=0; Number=0; Weight=0; WeightSD=0; InitialFatProteinStyle=4; Suckling=false; Sire=false; ProportionFleecePresent=0; ManagedPastureName=Not specified
              SpecifyRuminant Sires: RuminantTypeName=Ruminants.Bos indicus; Proportion=1
                RuminantTypeCohort 36mth sire: Sex=1; AgeDetails={Parts=[3, 0, 0]}; AgeSD=0; Number=0; Weight=0; WeightSD=0; InitialFatProteinStyle=4; Suckling=false; Sire=true; ProportionFleecePresent=0; ManagedPastureName=Not specified
            RuminantActivityBuySell Buy: ActivityStyle=Arrange purchases; BankAccountName=Finances.General account; TransactionCategory=Livestock.Manage; OnPartialResourcesAvailableAction=0
            RuminantActivityBuySell Sell: ActivityStyle=Arrange sales; BankAccountName=Finances.General account; TransactionCategory=Livestock.Manage; OnPartialResourcesAvailableAction=0
          SummariseRuminantHerd SummariseHerd: GroupStyle=0; AddGroupByLocation=false; IncludeTotalColumn=false
          ReportRuminantHerd ReportHerd: ReportAtStart=true; WithinTimeStepTiming=1
            RuminantGroup: RandomiseBeforeSorting=false
        CLEMFolder Reports
          ReportActivitiesPerformed: IncludeFolders=true; HandleTimers=1; CreateHTML=false; RotateReport=false; AutoCreateHTML=false
          ReportResourceBalances: ResourceGroupsToReport=[GrazeFoodStore, AnimalFoodStore, Ruminants]; ReportAmount=true; ReportValue=false; ReportAnimalEquivalents=false; ReportAnimalWeight=false; ReportHerdTotals=false; ReportLandEntire=false; ReportLabourIndividuals=false
            VariableNames:
              Land
              GrazeFoodStore
              AnimalFoodStore
              Ruminants
          ReportResourceShortfalls: PropPastureShortfallOfDesiredIntake=0.03; EventNames=[Activities].ResourceShortfallOccurred
            VariableNames:
              [Clock].Today as Date
              [Activities].LastShortfallResourceRequest.ResourceTypeName as Resource
              [Activities].LastShortfallResourceRequest.ActivityModel.Name as Activity
              [Activities].LastShortfallResourceRequest.Reason as Reason
              [Activities].LastShortfallResourceRequest.Required as Required
              [Activities].LastShortfallResourceRequest.Available as Available
          ReportResourceLedger GrazeFoodStoreLedger: ResourceGroupsToReport=GrazeFoodStore; ReportStyle=0; ReportLossesAsNegative=false; IncludePrice=false; IncludeFinancialYear=false; IncludeConversions=false; TransactionCategoryLevels=0; ReportRuminantAge=0; IncludeRuminantAE=false; IncludeRuminantBreed=false; IncludeRuminantCategory=false; IncludeRuminantChangeDirection=false; IncludeRuminantClass=false; IncludeRuminantID=false; IncludeRuminantLocation=false; IncludeRuminantRelatesTo=false; IncludeRuminantSex=false; IncludeRuminantWeight=false; IncludeRuminantGrowthRate=false; VariableNames=GrazeFoodStore
          ReportResourceLedger AnimalFoodLedger: ResourceGroupsToReport=AnimalFoodStore; ReportStyle=0; ReportLossesAsNegative=false; IncludePrice=false; IncludeFinancialYear=false; IncludeConversions=false; TransactionCategoryLevels=0; ReportRuminantAge=0; IncludeRuminantAE=false; IncludeRuminantBreed=false; IncludeRuminantCategory=false; IncludeRuminantChangeDirection=false; IncludeRuminantClass=false; IncludeRuminantID=false; IncludeRuminantLocation=false; IncludeRuminantRelatesTo=false; IncludeRuminantSex=false; IncludeRuminantWeight=false; IncludeRuminantGrowthRate=false; VariableNames=AnimalFoodStore
          ReportResourceLedger FinancesLedger: ResourceGroupsToReport=Finances; ReportStyle=0; ReportLossesAsNegative=false; IncludePrice=false; IncludeFinancialYear=false; IncludeConversions=false; TransactionCategoryLevels=0; ReportRuminantAge=0; IncludeRuminantAE=false; IncludeRuminantBreed=false; IncludeRuminantCategory=false; IncludeRuminantChangeDirection=false; IncludeRuminantClass=false; IncludeRuminantID=false; IncludeRuminantLocation=false; IncludeRuminantRelatesTo=false; IncludeRuminantSex=false; IncludeRuminantWeight=false; IncludeRuminantGrowthRate=false; VariableNames=Finances
          ReportResourceLedger HerdLedger: ResourceGroupsToReport=Ruminants; ReportStyle=0; ReportLossesAsNegative=false; IncludePrice=false; IncludeFinancialYear=false; IncludeConversions=false; TransactionCategoryLevels=0; ReportRuminantAge=1; IncludeRuminantAE=false; IncludeRuminantBreed=false; IncludeRuminantCategory=true; IncludeRuminantChangeDirection=false; IncludeRuminantClass=true; IncludeRuminantID=true; IncludeRuminantLocation=false; IncludeRuminantRelatesTo=false; IncludeRuminantSex=true; IncludeRuminantWeight=false; IncludeRuminantGrowthRate=false; VariableNames=Ruminants
          Report HerdSummary: EventNames=[Activities].SummariseHerd.OnReportItemGenerated
            VariableNames:
              [Clock].Today
              [Activities].SummariseHerd.ReportDetails.Breed as Breed
              [Activities].SummariseHerd.ReportDetails.Herd as Herd
              [Activities].SummariseHerd.ReportDetails.Age as AgeGroup
              [Activities].SummariseHerd.ReportDetails.Sex as Sex
              [Activities].SummariseHerd.ReportDetails.Number as Num
              [Activities].SummariseHerd.ReportDetails.AverageWeight as AvgWt
              [Activities].SummariseHerd.ReportDetails.AverageWeightGain as AvgWtGn
              [Activities].SummariseHerd.ReportDetails.AverageIntake as AvgIntake
              [Activities].SummariseHerd.ReportDetails.AdultEquivalents as AE
              [Activities].SummariseHerd.ReportDetails.NumberPregnant as NoPregnant
              [Activities].SummariseHerd.ReportDetails.NumberOfBirths as Births
          ReportResourceLedger LandLedger: ResourceGroupsToReport=Land; ReportStyle=0; ReportLossesAsNegative=false; IncludePrice=false; IncludeFinancialYear=false; IncludeConversions=false; TransactionCategoryLevels=0; ReportRuminantAge=0; IncludeRuminantAE=false; IncludeRuminantBreed=false; IncludeRuminantCategory=false; IncludeRuminantChangeDirection=false; IncludeRuminantClass=false; IncludeRuminantID=false; IncludeRuminantLocation=false; IncludeRuminantRelatesTo=false; IncludeRuminantSex=false; IncludeRuminantWeight=false; IncludeRuminantGrowthRate=false; VariableNames=Finances
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