Simulations: Version=217
  DataStore
  Memo Details
    # CLEM herd management examples

    The following simulations provide an example of each of the tasks performed in the RuminantActivityManage activity. You can use these examples to explore the model and check that the model is working as expected.

    Each example will build on the previous example until a managed herd is provided. For example we need to include the growing out (or at least sales) of young males to maintain the herd size, so this example is included in the breeder management example.

    ## Help
    The CLEM help system provides a model overview, user guide (how to) and a full description of every CLEM component, as well as in depth discussions on modelling various farm systems and what components to use. The Help documentation can be accessed by clicking the Help button beside the component name in the right hand information pane after selecting any CLEM component from your simulation tree or at [CLEM Help online](http://www.apsim.info/CLEM/Content/Home.htm).
  Simulation Increase herd at start
    Memo Description
      Herd management example
      # Increase male and female breeders at start of simulation

      ## Activity
      Activities.Manage herd.Manage numbers (Ruminant activity manage)

      ## Properties
      in Properties tab - Statup category
      - adjust female breeding numbers at start up = True
      - adjust male breeding numbers at start up = True

      in Properties tab - Herd size category
      - maximum number of breeders = 40
      - maximum sires kept = 0.1 (10% of max breeders)

      ## Initial herd
      - 20 female breeders and 2 male breeders
      - 5 Females age 24 months
      - 10 Females age 36 months
      - 5 Females age 48 months
      - 2 Males age 42 and sires

      ## Results
      - See category FillInitialHerd entries in HerdLedger report
      - See herd size in first month in HerdSummary report
    Clock: Start=1970-01-01; End=1970-01-31
      CLEMEvents: TimeStep=30; CustomTimeStep=0; EcologicalIndicatorsCalculationInterval=12; EcologicalIndicatorsCalculationMonth=7
    Summary summaryfile
    RandomNumberGenerator RandomNumbers: Seed=0
    ZoneCLEM CLEM: UserType=0; FarmMultiplier=1; DescriptiveSummaryFormatStyle=0; BuildTransactionCategoryFromTree=false; UseModelNameAsTransactionCategory=false; Area=0; Slope=0; AspectAngle=0; Altitude=50
      FileCrop FileForage: FileName=%root%\Examples\CLEM\FileForage.prn; CropNameColumnName=CropName; SoilTypeColumnName=SoilNum; YearColumnName=Year; MonthColumnName=Month; AmountColumnName=AmtKg
      ResourcesHolder Resources
        Land: UnitsOfArea=hectares; UnitsOfAreaToHaConversion=1
          LandType Paddock1: LandArea=250; PortionBuildings=0; ProportionOfTotalArea=1; SoilType=2
        Finance Finances: FirstMonthOfFinancialYear=7
          FinanceType General account: OpeningBalance=100000; EnforceWithdrawalLimit=false; WithdrawalLimit=0; InterestRateCharged=7.5; InterestRatePaid=2
        RuminantHerd Ruminants: TransactionStyle=0
          RuminantType Bos indicus
            RuminantInitialCohorts Initial cohorts: WeightWarningOccurred=false; ManagedPastureName=Not specified
              RuminantTypeCohort Female24: Sex=0; AgeDetails={Parts=[2, 0, 0]}; AgeSD=0; Number=5; Weight=400; WeightSD=0; InitialFatProteinStyle=4; Suckling=false; Sire=false; ProportionFleecePresent=0; ManagedPastureName=Not specified
              RuminantTypeCohort Female36: Sex=0; AgeDetails={Parts=[3, 0, 0]}; AgeSD=0; Number=10; Weight=520; WeightSD=0; InitialFatProteinStyle=4; Suckling=false; Sire=false; ProportionFleecePresent=0; ManagedPastureName=Not specified
              RuminantTypeCohort Female48: Sex=0; AgeDetails={Parts=[4, 0, 0]}; AgeSD=0; Number=5; Weight=520; WeightSD=0; InitialFatProteinStyle=4; Suckling=false; Sire=false; ProportionFleecePresent=0; ManagedPastureName=Not specified
              RuminantTypeCohort Male42: Sex=1; AgeDetails={Parts=[3, 6, 0]}; AgeSD=0; Number=2; Weight=610; WeightSD=0; InitialFatProteinStyle=4; Suckling=false; Sire=true; ProportionFleecePresent=0; ManagedPastureName=Not specified
            AnimalPricing Prices
              AnimalPriceGroup Weaners_LT_12m: PricingStyle=1; Value=2.5; PurchaseOrSale=0; RandomiseBeforeSorting=false
                FilterByProperty LT_12m: PropertyOfIndividual=AgeInYears; Operator=20; Value=1
              AnimalPriceGroup Female1_3_Buy: PricingStyle=1; Value=2.3; PurchaseOrSale=1; RandomiseBeforeSorting=false
                FilterByProperty Female: PropertyOfIndividual=Sex; Operator=13; Value=Female
                FilterByProperty less36months: PropertyOfIndividual=AgeInYears; Operator=20; Value=3
              AnimalPriceGroup Female1_3_Sell: PricingStyle=1; Value=2.5; PurchaseOrSale=2; RandomiseBeforeSorting=false
                FilterByProperty Female: PropertyOfIndividual=Sex; Operator=13; Value=Female
                FilterByProperty less36months: PropertyOfIndividual=AgeInYears; Operator=20; Value=3
              AnimalPriceGroup Female 3plus: PricingStyle=1; Value=2.2; PurchaseOrSale=0; RandomiseBeforeSorting=false
                FilterByProperty Female: PropertyOfIndividual=Sex; Operator=13; Value=Female
                FilterByProperty 36months: PropertyOfIndividual=AgeInYears; Operator=16; Value=3
              AnimalPriceGroup Breeding Sires: PricingStyle=1; Value=2.2; PurchaseOrSale=0; RandomiseBeforeSorting=false
                FilterByProperty isSire: PropertyOfIndividual=Male.IsSire; Operator=83
              AnimalPriceGroup Male1_3: PricingStyle=1; Value=2.5; PurchaseOrSale=0; RandomiseBeforeSorting=false
                FilterByProperty Male: PropertyOfIndividual=Sex; Operator=13; Value=Male
                FilterByProperty less36months: PropertyOfIndividual=AgeInYears; Operator=20; Value=3
              AnimalPriceGroup Male 3plus: PricingStyle=1; Value=2.4; PurchaseOrSale=0; RandomiseBeforeSorting=false
                FilterByProperty Male: PropertyOfIndividual=Sex; Operator=13; Value=Male
                FilterByProperty 36months: PropertyOfIndividual=AgeInYears; Operator=16; Value=3
            RuminantConceptionCurve: ConceptionRateCoefficent=-14.247; ConceptionRateIntercept=5.182; ConceptionRateAsymptote=90
            RuminantParametersHolder Parameters: DisplaySummaryParameters=true
              RuminantParametersBreeding Breeding: OestrusCycleLength=20; DaysInHeat=2; ProportionOffspringMale=0.5; DaysLastBirthToStartOestrus=20; MaximumMaleMatingsPerDay=30; AllowFreemartins=false; ConceptionDuringLactationProbability=1; DystociaCoefficients=[0, 0]
              RuminantParametersGeneral General: Breed=Bos taurus; NaturalWeaningAge={Parts=[0]}; MinimumSizeForMaturityFemale=0.6; MinimumSizeForMaturityMale=0.6; GestationLength={Parts=[0, 9, 0]}; MultipleBirthRate=[0]; SRWFemale=460; SRWCastrateMaleMultiplier=1.2; SRWMaleMultiplier=1.4; BirthScalar=[0.07, 0.07]; EffectRelativeSizeBirthWeight_CP4=0.33; BaseAnimalEquivalent=450; RelBCToScoreRate=0.15; BCScoreRange=[0, 3, 5]; ProportionEBWFatFemale=0.25; ProportionEBWFatMale=0.25; ProportionEBWFatMax=0.45; GutFillMinimum=0.04; AgeGrowthRateCoefficientProvisionStyle=0; AgeGrowthRateCoefficient_CN1=0.015; CN1EstimatedWeaningWeight=0; CN1EstimatedWeaningAge={Parts=[0]}; SRWGrowthScalar_CN2=0.27; SlowGrowthFactor_CN3=0.4; MJEnergyPerKgFat=39.3; MJEnergyPerKgProtein=23.6; IncludeWool=false
              RuminantParametersGrazing Grazing: GreenDietMax=0.98; GreenDietCoefficient=0.15; GreenDietZero=0.04; IntakeCoefficientBiomass=0.01; StrictFeedingLimits=true
              RuminantParametersGrow GrowParams: MortalityBase=0.03; GrowthEnergyIntercept1=6.7; GrowthEnergyIntercept2=20.3; EMaintEfficiencyCoefficient=0.368; EMaintEfficiencyIntercept=0.503; EGrowthEfficiencyCoefficient=0.79; EGrowthEfficiencyIntercept=0; ELactationEfficiencyCoefficient=0.35; ELactationEfficiencyIntercept=0.42; EMaintExponent=8.2e-05; EMaintIntercept=0.09; EMaintCoefficient=0.26; EnergyMaintenanceMaximumAge={Parts=[6, 0, 0]}; Kme=1.2; GrowthEfficiency=1; IntakeCoefficient=0.02425; IntakeIntercept=1.7; ProteinCoefficient=130; ProteinDegradability=0.9; MilkIntakeCoefficient=0.1206; MilkIntakeIntercept=3.8146; MilkIntakeMaximum=20; MilkLWTFodderSubstitutionProportion=0.2; MaxJuvenileIntake=0.03; ProportionalDiscountDueToMilk=0.3; WoolCoefficient=0; CashmereCoefficient=0; LactatingPotentialModifierConstantA=0.32; LactatingPotentialModifierConstantB=61; LactatingPotentialModifierConstantC=1.7
              RuminantParametersGrowPF GrowPFParams
                RuminantParametersGrowPFCACRD CACRD: RumenDegradabilityIntercept_CRD1=0.3; RumenDegradabilitySlope_CRD2=0.25; RumenDegradabilityConcentrateSlope_CRD3=0.1; RumenDegradableProteinIntercept_CRD4=0.007; RumenDegradableProteinSlope_CRD5=0.005; RumenDegradableProteinExponent_CRD6=0.35; ProteinShortfallAlleviationScalar=0.5; MilkProteinDigestibility_CA5=0.92; MicrobialProteinDigestibility_CA7=0.6; FaecalProteinFromMCP_CA8=0.25
                RuminantParametersGrowPFCD CD: BasalMortalityRate_CD1=5.53e-05; EffectBCOnMortality1_CD2=0.3; EffectBCOnMortality2_CD3=0.6; CriticalFatToEBMForSurvival=0.05; RelativeDifferenceWeightDyingIndividuals_CD12=0.1; UpperLimitForMortalityInWeaners_CD13=0.0001
                RuminantParametersGrowPFCG CG: EfficiencyOfDPLSUseForWool_CG1=0.6; EfficiencyOfDPLSUseFromFeed_CG2=0.7; EfficiencyOfDPLSUseFromMilk_CG3=0.8; GainCurvature_CG4=6; GainMidpoint_CG5=0.4; ConditionNoEffect_CG6=0.9; ConditionMaxEffect_CG7=0.97; GrowthEnergyIntercept1_CG8b=6.7; GrowthEnergyIntercept2_CG9=16.5; GrowthEnergySlope1_CG10=2; GrowthEnergySlope2_CG11=13.8; ProteinGainIntercept1_CG12b=0.21; ProteinGainIntercept2_CG13=0.12; ProteinGainSlope1_CG14b=0.004; ProteinGainSlope2_CG15=0.115; BreedGrowthEfficiencyScalar=1; BreedLactationEfficiencyScalar=1; BreedMainenanceEfficiencyScalar=1; ProteinContentOfFatFreeTissueGainWetBasis=0.21; ProteinContentOfFatFreeTissueGainWetBasisAtBirth=0.1373; DaysUntilStandardProteinContentOfFatFreeTissueGainWetBasis=30; DietaryProteinEnergyReleaseEfficiency=0.5; DietaryProteinEnergyReleaseEfficiencyWhenNetEnergyDeficit=0.8; FatPercentToProportionEDeficitTakenFromBodyFatIntercept=0.875; FatPercentToProportionEDeficitTakenFromBodyFatSlope=0.033
                RuminantParametersGrowPFCI CI: IntakeReductionFromInsufficientRDPIntake=0.5; IgnoreFeedQualityIntakeAdjustment=true; RelativeSizeScalar_CI1=0.025; RelativeSizeQuadratic_CI2=1.7; RumenDevelopmentCurvature_CI3=0.22; RumenDevelopmentAge_CI4=60; PeakLactationIntakeDay_CI8=62; LactationResponseCurvature_CI9=1.7; EffectLevelsMilkProdOnIntake_CI10=0.6; BasalMilkRelSRW_CI11=0.05; LactationConditionLossAdjustment_CI12=0.15; LactationConditionLossThreshold_CI13=0.005; LactationConditionLossThresholdDecay_CI14=0.002; ConditionAtParturitionAdjustment_CI15=0.5; PeakLactationIntakeLevel_CI19=[0.416, 0.416]; RelativeConditionEffect_CI20=1.5; DigestibilityPeak_CR1=0.8; DigestibilitySlope_CR3=1.25; QualityIntakeSubsititutionFactorNonLactating_CR11=10.5; QualityIntakeSubsititutionFactorLactating_CR20=11.5; MethaneEmissionsParameter1=0.0184; MethaneEmissionsParameter2=13; MethaneEmissionsParameter3=7.52; MethaneEmissionsParameter4=23.7; MethaneEmissionsParameter5=3.36
                RuminantParametersGrowPFCKCL CKCL: ELactationEfficiencyIntercept_CK5=0.4; ELactationEfficiencyCoefficient_CK6=0.02; ExpectedPeakYield=20; PeakYieldScalar_CL0=[0.375, 0.375]; MetabolisabilityOfMilk_CL5=0.94; EnergyContentMilk_CL6=3.1; LactationEnergyDeficit_CL7=1.17; MilkConsumptionLimit1_CL12=0.42; MilkConsumptionLimit2_CL13=0.58; MilkConsumptionLimit3_CL14=0.036; ProteinPercentMilk_CL15=3.2; AdjustmentOfPotentialYieldReduction_CL16=0.7; PotentialYieldReduction_CL17=0.01; PotentialYieldReduction2_CL18=0.1; PotentialLactationYieldParameter_CL19=1.6; PotentialYieldMEIEffect_CL20=4; PotentialYieldLactationEffect_CL21=0.004; PotentialYieldLactationEffect2_CL22=0.006; PotentialYieldConditionEffect_CL23=3; PotentialYieldConditionEffect2_CL24=0.6
                RuminantParametersGrowPFCM CM: HPVisceraFL_CM1=0.09; FHPScalar_CM2=0.31; MainExponentForAge_CM3=8e-05; AgeEffectMin_CM4=0.84; MilkScalar_CM5=0.23; GrazingEnergyFromMetabolicScalar_CM6=0.0025; EFPFromMilkDiet_CM11=0.000526; BreedEUPFactor1_CM12=0.012; BreedEUPFactor2_CM13=0.0338; DermalLoss_CM14=0.00011
                RuminantParametersGrowPFCP CP: FetalNormWeightParameter_CP2=2.2; FetalNormWeightParameter2_CP3=1.77; EffectFetalRelativeSizeOnBirthWeight_CP4=0.33; ConceptusWeightRatio_CP5=1.8; ConceptusWeightParameter_CP6=2.42; ConceptusWeightParameter2_CP7=1.16; ConceptusEnergyContent_CP8=4.11; ConceptusEnergyParameter_CP9=343.5; ConceptusEnergyParameter2_CP10=0.0164; ConceptusProteinContent_CP11=0.134; ConceptusProteinParameter_CP12=6.22; ConceptusProteinParameter2_CP13=0.747; FetalGrowthPoorCondition_CP14=[1, 1.15]; ToxaemiaCoefficients=[0, 0]
              RuminantParametersGrowMortality Mortality: MortalityCoefficient=2.5; MortalityIntercept=0.05; MortalityExponent=3; JuvenileMortalityCoefficient=3; JuvenileMortalityMaximum=0.2; JuvenileMortalityExponent=1.8
              RuminantParametersLactation: MilkingDays=300; MilkPeakYield=4; MilkCurveSuckling_CL3=0.6; MilkCurveNonSuckling_CL4=0.11; MilkOffsetDay=4; MilkPeakDay=30
        GrazeFoodStore
          GrazeFoodStoreType NativePasture: TypeOfFeed=4; GrossEnergyContent=18.4; MetabolisableEnergyContent=8; NitrogenPercent=0; GreenNitrogenPercent=2; DecayNitrogen=0.35; MinimumNitrogen=0.4; RumenDegradableProteinPercent=58; DMDStyle=1; DryMatterDigestibility=0; GreenDMD=58; NToDMDCoefficient=11.03; NToDMDIntercept=41.4; DecayDMD=0.1; MinimumDMD=43; DetachRate=0.03; CarryoverDetachRate=0.12; AcidDetergentInsolubleProtein=0; CrudeProteinPercent=0; FatPercent=1.9; GutFillHighQuality=0.08; GutFillLowQuality=0.2; IntakeTropicalQualityCoefficient=0.16; IntakeQualityCoefficient=1.7; StartingAmount=0; FirstMonthOfGrowSeason=11; LastMonthOfGrowSeason=3; NumberMonthsForInitialBiomass=5
        AnimalFoodStore
          AnimalFoodStoreType Hay: TypeOfFeed=0; GrossEnergyContent=18.4; MetabolisableEnergyContent=6.1; FatPercent=1.2; DryMatterDigestibility=44.7; CPContentStyle=0; UserNitrogenPercent=0; UserCrudeProteinPercent=8.8; GutFill=0.08; CrudeProteinPercent=0; NitrogenPercent=0; RumenDegradableProteinPercent=70; AcidDetergentInsolubleProtein=0.107; StartingAmount=100
            Transmutation Purchase: TransmutationPacketSize=1000; UseWholePackets=false; TransactionCategory=Transmutation
              Transmute: TransmuteResourceTypeName=Finances.General account; AmountPerPacket=100; TransmuteStyle=0; FinanceTypeForTransactionsName=No transactions
      ActivitiesHolder Activities
        CropActivityManageCrop Native Pasture on farm: LandItemNameToUse=Land.Paddock1; AreaRequested=100; UseAreaAvailable=true; TransactionCategory=Crop; OnPartialResourcesAvailableAction=0
          CropActivityManageProduct Native Pasture to GrazeFoodStore: ModelNameFileCrop=FileForage; CropName=Native; StoreItemName=GrazeFoodStore.NativePasture; AddProductStyle=0; ProportionKept=1; PlantedMultiplier=1; TreesPerHa=0; TransactionCategory=Crop.[Product]; OnPartialResourcesAvailableAction=0
        ActivityFolder Manage herd: OnPartialResourcesAvailableAction=0
          RuminantActivityGrow Grow all ruminants: EnergyGross=18.4; OnPartialResourcesAvailableAction=0; TransactionCategory=Livestock.Manage
          RuminantActivityMove Move to pasture: ManagedPastureName=GrazeFoodStore.NativePasture; PerformAtStartOfSimulation=true; MoveSucklings=false; TimeStepTiming=2; TransactionCategory=Livestock.Manage; OnPartialResourcesAvailableAction=0
            RuminantGroup All: RandomiseBeforeSorting=false
          RuminantActivityGrazeAll Graze all: HoursGrazed=8; TransactionCategory=Livestock.Grazing; OnPartialResourcesAvailableAction=2
          RuminantActivityManage Manage numbers: ManageFemaleBreederNumbers=true; PerformFemaleDestocking=true; PerformFemaleStocking=true; PerformMaleDestocking=true; PerformMaleStocking=true; MaximumBreedersKept=40; MinimumBreedersKept=200; MaxBreedersMultiplierToStop=10; MarkOldBreedersForSale=true; MaximumBreederAge={Parts=[10, 0, 0]}; MaximumProportionBreedersPerPurchase=1; ReturnPregnantMaxAgeToHerd=false; RetainFemaleReplacementBreedersFromSaleHerd=true; ManageMaleBreederNumbers=true; MaximumSiresKept=0.1; MarkOldSiresForSale=true; MaximumSireAge={Parts=[8, 0, 0]}; AllowSireReplacement=false; RestockSiresRelativeToBreeders=false; MaximumSiresPerPurchase=1; RetainMaleReplacementBreedersFromSaleHerd=true; GrowOutYoungMales=true; ContinuousGrowOutSales=false; MarkAgeWeightMalesForSale=true; CastrateMales=true; MaleSellingAge={Parts=[1, 6, 0]}; MaleSellingWeight=350; GrowOutYoungFemales=false; FemaleSellingAge={Parts=[2, 0, 0]}; FemaleSellingWeight=300; MarkAgeWeightFemalesForSale=true; GrazeFoodStoreNameSires=GrazeFoodStore.NativePasture; GrazeFoodStoreNameBreeders=GrazeFoodStore.NativePasture; GrazeFoodStoreNameGrowOutFemales=GrazeFoodStore.NativePasture; GrazeFoodStoreNameGrowOutMales=GrazeFoodStore.NativePasture; MinimumPastureBeforeRestock=1500; AdjustBreedingFemalesAtStartup=true; AdjustOthersToFemaleBreedersPropAtStartup=false; AdjustBreedingMalesAtStartup=true; TransactionCategory=Livestock.Manage; OnPartialResourcesAvailableAction=0
            ActivityTimerCalendar every August: StartDetails={Parts=[0, 8, 0]}; EndDetails={Parts=[0, 8, 0]}; RepeatInterval={Parts=[1, 0, 0]}; WholeTimeStepMustBeInRange=false; Invert=false
            SpecifyRuminant Breeders: RuminantTypeName=Ruminants.Bos indicus; Proportion=1
              RuminantTypeCohort 24mth breeder: Sex=0; AgeDetails={Parts=[2, 0, 0]}; AgeSD=0; Number=0; Weight=0; WeightSD=0; InitialFatProteinStyle=4; Suckling=false; Sire=false; ProportionFleecePresent=0; ManagedPastureName=Not specified
            SpecifyRuminant Sires: RuminantTypeName=Ruminants.Bos indicus; Proportion=1
              RuminantTypeCohort 36mth sire: Sex=1; AgeDetails={Parts=[3, 0, 0]}; AgeSD=0; Number=0; Weight=0; WeightSD=0; InitialFatProteinStyle=4; Suckling=false; Sire=true; ProportionFleecePresent=0; ManagedPastureName=Not specified
          RuminantActivityBuySell Sell: ActivityStyle=Arrange sales; BankAccountName=Finances.General account; TransactionCategory=Livestock.Manage; OnPartialResourcesAvailableAction=0
          RuminantActivityBuySell Buy: ActivityStyle=Arrange purchases; BankAccountName=Finances.General account; TransactionCategory=Livestock.Manage; OnPartialResourcesAvailableAction=0
        SummariseRuminantHerd SummariseHerd: GroupStyle=0; AddGroupByLocation=false; IncludeTotalColumn=false
      CLEMFolder Reports
        ReportActivitiesPerformed: IncludeFolders=true; HandleTimers=1; CreateHTML=false; RotateReport=false; AutoCreateHTML=false
        ReportResourceBalances: ResourceGroupsToReport=[GrazeFoodStore, AnimalFoodStore, Ruminants]; ReportAmount=true; ReportValue=false; ReportAnimalEquivalents=false; ReportAnimalWeight=false; ReportHerdTotals=false; ReportLandEntire=false; ReportLabourIndividuals=false
          VariableNames:
            Land
            GrazeFoodStore
            AnimalFoodStore
            Ruminants
        ReportResourceShortfalls: PropPastureShortfallOfDesiredIntake=0.03; EventNames=[Activities].ResourceShortfallOccurred
          VariableNames:
            [Clock].Today as Date
            [Activities].LastShortfallResourceRequest.ResourceTypeName as Resource
            [Activities].LastShortfallResourceRequest.ActivityModel.Name as Activity
            [Activities].LastShortfallResourceRequest.Reason as Reason
            [Activities].LastShortfallResourceRequest.Required as Required
            [Activities].LastShortfallResourceRequest.Available as Available
        ReportResourceLedger HerdLedger: ResourceGroupsToReport=Ruminants; ReportStyle=0; ReportLossesAsNegative=false; IncludePrice=false; IncludeFinancialYear=false; IncludeConversions=false; TransactionCategoryLevels=0; ReportRuminantAge=1; IncludeRuminantAE=false; IncludeRuminantBreed=false; IncludeRuminantCategory=true; IncludeRuminantChangeDirection=true; IncludeRuminantClass=true; IncludeRuminantID=false; IncludeRuminantLocation=false; IncludeRuminantRelatesTo=false; IncludeRuminantSex=true; IncludeRuminantWeight=false; IncludeRuminantGrowthRate=false; VariableNames=Ruminants
        Report HerdSummary: EventNames=[Activities].SummariseHerd.OnReportItemGenerated
          VariableNames:
            [Clock].Today
            [Activities].SummariseHerd.ReportDetails.Breed as Breed
            [Activities].SummariseHerd.ReportDetails.Herd as Herd
            [Activities].SummariseHerd.ReportDetails.Age as AgeGroup
            [Activities].SummariseHerd.ReportDetails.Sex as Sex
            [Activities].SummariseHerd.ReportDetails.Number as Num
            [Activities].SummariseHerd.ReportDetails.AverageWeight as AvgWt
            [Activities].SummariseHerd.ReportDetails.AverageWeightGain as AvgWtGn
            [Activities].SummariseHerd.ReportDetails.AverageIntake as AvgIntake
            [Activities].SummariseHerd.ReportDetails.AdultEquivalents as AE
            [Activities].SummariseHerd.ReportDetails.NumberPregnant as NoPregnant
            [Activities].SummariseHerd.ReportDetails.NumberOfBirths as Births
  Simulation Reduce herd at start
    Memo Description
      Herd management example
      # Reduce male and female breeders at start of simulation

      ## Activity
      Activities.Manage herd.Manage numbers (Ruminant activity manage)

      ## Properties
      in Properties tab - Statup category
      - adjust female breeding numbers at start up = True
      - adjust male breeding numbers at start up = True

      in Properties tab - Herd size category
      - maximum number of breeders = 10
      - maximum sires kept = 0.1 (10% of max breeders)

      ## Initial herd
      - 20 female breeders and 2 male breeders
      - 5 Females age 24 months
      - 10 Females age 36 months
      - 5 Females age 48 months
      - 2 Males age 42 and sires

      ## Results
      - See category FillInitialHerd entries in HerdLedger report
      - See herd size in first month in HerdSummary report
    Clock: Start=1970-01-01; End=1970-01-31
      CLEMEvents: TimeStep=30; CustomTimeStep=0; EcologicalIndicatorsCalculationInterval=12; EcologicalIndicatorsCalculationMonth=7
    Summary summaryfile
    RandomNumberGenerator RandomNumbers: Seed=0
    ZoneCLEM CLEM: UserType=0; FarmMultiplier=1; DescriptiveSummaryFormatStyle=0; BuildTransactionCategoryFromTree=false; UseModelNameAsTransactionCategory=false; Area=0; Slope=0; AspectAngle=0; Altitude=50
      FileCrop FileForage: same as Increase herd at start.CLEM.FileForage
      ResourcesHolder Resources
        Land: UnitsOfArea=hectares; UnitsOfAreaToHaConversion=1
          LandType Paddock1: LandArea=250; PortionBuildings=0; ProportionOfTotalArea=1; SoilType=2
        Finance Finances: FirstMonthOfFinancialYear=7
          FinanceType General account: OpeningBalance=100000; EnforceWithdrawalLimit=false; WithdrawalLimit=0; InterestRateCharged=7.5; InterestRatePaid=2
        RuminantHerd Ruminants: TransactionStyle=0
          RuminantType Bos indicus
            RuminantInitialCohorts Initial cohorts: WeightWarningOccurred=true; ManagedPastureName=Not specified
              RuminantTypeCohort Female24: same as Increase herd at start.CLEM.Resources.Ruminants.Bos indicus.Initial cohorts.Female24
              RuminantTypeCohort Female36: same as Increase herd at start.CLEM.Resources.Ruminants.Bos indicus.Initial cohorts.Female36
              RuminantTypeCohort Female48: same as Increase herd at start.CLEM.Resources.Ruminants.Bos indicus.Initial cohorts.Female48
              RuminantTypeCohort Male42: same as Increase herd at start.CLEM.Resources.Ruminants.Bos indicus.Initial cohorts.Male42
            AnimalPricing Prices: same as Increase herd at start.CLEM.Resources.Ruminants.Bos indicus.Prices
            RuminantConceptionCurve: ConceptionRateCoefficent=-14.247; ConceptionRateIntercept=5.182; ConceptionRateAsymptote=90
            RuminantParametersHolder Parameters: same as Increase herd at start.CLEM.Resources.Ruminants.Bos indicus.Parameters
        GrazeFoodStore: same as Increase herd at start.CLEM.Resources.GrazeFoodStore
        AnimalFoodStore: same as Increase herd at start.CLEM.Resources.AnimalFoodStore
      ActivitiesHolder Activities
        CropActivityManageCrop Native Pasture on farm: same as Increase herd at start.CLEM.Activities.Native Pasture on farm
        ActivityFolder Manage herd: OnPartialResourcesAvailableAction=0
          RuminantActivityGrow Grow all ruminants: EnergyGross=18.4; OnPartialResourcesAvailableAction=0; TransactionCategory=Livestock.Manage
          RuminantActivityMove Move to pasture: same as Increase herd at start.CLEM.Activities.Manage herd.Move to pasture
          RuminantActivityGrazeAll Graze all: HoursGrazed=8; TransactionCategory=Livestock.Grazing; OnPartialResourcesAvailableAction=2
          RuminantActivityManage Manage numbers: ManageFemaleBreederNumbers=true; PerformFemaleDestocking=true; PerformFemaleStocking=true; PerformMaleDestocking=true; PerformMaleStocking=true; MaximumBreedersKept=10; MinimumBreedersKept=200; MaxBreedersMultiplierToStop=10; MarkOldBreedersForSale=true; MaximumBreederAge={Parts=[10, 0, 0]}; MaximumProportionBreedersPerPurchase=1; ReturnPregnantMaxAgeToHerd=false; RetainFemaleReplacementBreedersFromSaleHerd=true; ManageMaleBreederNumbers=true; MaximumSiresKept=0.1; MarkOldSiresForSale=true; MaximumSireAge={Parts=[8, 0, 0]}; AllowSireReplacement=false; RestockSiresRelativeToBreeders=false; MaximumSiresPerPurchase=1; RetainMaleReplacementBreedersFromSaleHerd=true; GrowOutYoungMales=true; ContinuousGrowOutSales=false; MarkAgeWeightMalesForSale=true; CastrateMales=true; MaleSellingAge={Parts=[1, 6, 0]}; MaleSellingWeight=350; GrowOutYoungFemales=false; FemaleSellingAge={Parts=[2, 0, 0]}; FemaleSellingWeight=300; MarkAgeWeightFemalesForSale=true; GrazeFoodStoreNameSires=GrazeFoodStore.NativePasture; GrazeFoodStoreNameBreeders=GrazeFoodStore.NativePasture; GrazeFoodStoreNameGrowOutFemales=GrazeFoodStore.NativePasture; GrazeFoodStoreNameGrowOutMales=GrazeFoodStore.NativePasture; MinimumPastureBeforeRestock=1500; AdjustBreedingFemalesAtStartup=true; AdjustOthersToFemaleBreedersPropAtStartup=false; AdjustBreedingMalesAtStartup=true; TransactionCategory=Livestock.Manage; OnPartialResourcesAvailableAction=0
            ActivityTimerCalendar every August: same as Increase herd at start.CLEM.Activities.Manage herd.Manage numbers.every August
            SpecifyRuminant Breeders: same as Increase herd at start.CLEM.Activities.Manage herd.Manage numbers.Breeders
            SpecifyRuminant Sires: same as Increase herd at start.CLEM.Activities.Manage herd.Manage numbers.Sires
          RuminantActivityBuySell Buy: ActivityStyle=Arrange purchases; BankAccountName=Finances.General account; TransactionCategory=Livestock.Manage; OnPartialResourcesAvailableAction=0
          RuminantActivityBuySell Sell: ActivityStyle=Arrange sales; BankAccountName=Finances.General account; TransactionCategory=Livestock.Manage; OnPartialResourcesAvailableAction=0
        SummariseRuminantHerd SummariseHerd: GroupStyle=0; AddGroupByLocation=false; IncludeTotalColumn=false
      CLEMFolder Reports: same as Increase herd at start.CLEM.Reports
  Simulation Grow out males
    Memo Description
      Herd management example
      # Manage males as grow out with age/weight sales

      ## Activity
      Activities.Manage herd.Manage numbers (Ruminant activity manage)

      ## Properties

      in Properties tab - Herd size category
      - Perform growing out of young males = true
      - Sell grow out males = true
      - Grow out males selling age = 18
      - Grow out male selling weight = 350
      - Castrate males = true

      Other settings
      - maximum breeder herd to 60 allowing increase from initial herd of 20
      - minimum breeder herd to 20 so no purchases will be made until herd falls below 20

      ## Initial herd
      - 20 female breeders and 2 male breeders
      - 5 Females age 24 months
      - 10 Females age 36 months
      - 5 Females age 48 months
      - 2 Males age 42 and sires

      ## Results
      - See herd AgeWeightSales category in HerdLedger report where individuals are of class = Castrated
      - See herd size in year one in HerdSummary report to see juvenile males castrated
      - The first castrated males from weaning and herd management appear in January 1972
      - The first age/weight sales of grow out males occur during herd management in August 1972
    Clock: Start=1970-01-01; End=1980-01-31
      CLEMEvents: TimeStep=30; CustomTimeStep=0; EcologicalIndicatorsCalculationInterval=12; EcologicalIndicatorsCalculationMonth=7
    Summary summaryfile
    RandomNumberGenerator RandomNumbers: Seed=0
    ZoneCLEM CLEM: UserType=0; FarmMultiplier=1; DescriptiveSummaryFormatStyle=0; BuildTransactionCategoryFromTree=false; UseModelNameAsTransactionCategory=false; Area=0; Slope=0; AspectAngle=0; Altitude=50
      FileCrop FileForage: same as Increase herd at start.CLEM.FileForage
      ResourcesHolder Resources: same as Reduce herd at start.CLEM.Resources
      ActivitiesHolder Activities
        CropActivityManageCrop Native Pasture on farm: LandItemNameToUse=Land.Paddock1; AreaRequested=1000; UseAreaAvailable=true; TransactionCategory=Crop; OnPartialResourcesAvailableAction=0
          CropActivityManageProduct Native Pasture to GrazeFoodStore: ModelNameFileCrop=FileForage; CropName=Native; StoreItemName=GrazeFoodStore.NativePasture; AddProductStyle=0; ProportionKept=1; PlantedMultiplier=1; TreesPerHa=0; TransactionCategory=Crop.[Product]; OnPartialResourcesAvailableAction=0
        ActivityFolder Manage herd: OnPartialResourcesAvailableAction=0
          RuminantActivityGrow Grow all ruminants: EnergyGross=18.4; OnPartialResourcesAvailableAction=0; TransactionCategory=Livestock.Manage
          RuminantActivityMove Move to pasture: same as Increase herd at start.CLEM.Activities.Manage herd.Move to pasture
          RuminantActivityGrazeAll Graze all: HoursGrazed=8; TransactionCategory=Livestock.Grazing; OnPartialResourcesAvailableAction=2
          RuminantActivityManage Manage numbers: ManageFemaleBreederNumbers=true; PerformFemaleDestocking=true; PerformFemaleStocking=true; PerformMaleDestocking=true; PerformMaleStocking=true; MaximumBreedersKept=60; MinimumBreedersKept=20; MaxBreedersMultiplierToStop=10; MarkOldBreedersForSale=true; MaximumBreederAge={Parts=[10, 0, 0]}; MaximumProportionBreedersPerPurchase=1; ReturnPregnantMaxAgeToHerd=false; RetainFemaleReplacementBreedersFromSaleHerd=true; ManageMaleBreederNumbers=true; MaximumSiresKept=0.1; MarkOldSiresForSale=true; MaximumSireAge={Parts=[8, 0, 0]}; AllowSireReplacement=false; RestockSiresRelativeToBreeders=false; MaximumSiresPerPurchase=1; RetainMaleReplacementBreedersFromSaleHerd=true; GrowOutYoungMales=true; ContinuousGrowOutSales=false; MarkAgeWeightMalesForSale=true; CastrateMales=true; MaleSellingAge={Parts=[1, 6, 0]}; MaleSellingWeight=350; GrowOutYoungFemales=false; FemaleSellingAge={Parts=[2, 0, 0]}; FemaleSellingWeight=300; MarkAgeWeightFemalesForSale=false; GrazeFoodStoreNameSires=GrazeFoodStore.NativePasture; GrazeFoodStoreNameBreeders=GrazeFoodStore.NativePasture; GrazeFoodStoreNameGrowOutFemales=GrazeFoodStore.NativePasture; GrazeFoodStoreNameGrowOutMales=GrazeFoodStore.NativePasture; MinimumPastureBeforeRestock=1500; AdjustBreedingFemalesAtStartup=false; AdjustOthersToFemaleBreedersPropAtStartup=false; AdjustBreedingMalesAtStartup=false; TransactionCategory=Livestock.Manage; OnPartialResourcesAvailableAction=0
            ActivityTimerCalendar every August: same as Increase herd at start.CLEM.Activities.Manage herd.Manage numbers.every August
            SpecifyRuminant Breeders: same as Increase herd at start.CLEM.Activities.Manage herd.Manage numbers.Breeders
            SpecifyRuminant Sires: same as Increase herd at start.CLEM.Activities.Manage herd.Manage numbers.Sires
          RuminantActivityBreed Breed: InferStartupPregnancy=false; TransactionCategory=Livestock.Manage; OnPartialResourcesAvailableAction=0
            RuminantActivityControlledMating ControlledMating: MaximumAgeMating={Parts=[10, 0, 0]}; JoiningsPerMale=1; TransactionCategory=Livestock.Manage; OnPartialResourcesAvailableAction=0
              ActivityTimerCalendar Controlled mating: StartDetails={Parts=[0, 3, 0]}; EndDetails={Parts=[0, 3, 0]}; RepeatInterval={Parts=[1, 0, 0]}; WholeTimeStepMustBeInRange=false; Invert=false
          RuminantActivityBuySell Buy: ActivityStyle=Arrange purchases; BankAccountName=Finances.General account; TransactionCategory=Livestock.Manage; OnPartialResourcesAvailableAction=0
          RuminantActivityBuySell Sell: ActivityStyle=Arrange sales; BankAccountName=Finances.General account; TransactionCategory=Livestock.Manage; OnPartialResourcesAvailableAction=0
        SummariseRuminantHerd SummariseHerd: GroupStyle=1; AddGroupByLocation=false; IncludeTotalColumn=false
      CLEMFolder Reports
        ReportActivitiesPerformed: IncludeFolders=true; HandleTimers=1; CreateHTML=false; RotateReport=false; AutoCreateHTML=false
        ReportResourceBalances: same as Increase herd at start.CLEM.Reports.ReportResourceBalances
        ReportResourceShortfalls: same as Increase herd at start.CLEM.Reports.ReportResourceShortfalls
        ReportResourceLedger HerdLedger: same as Increase herd at start.CLEM.Reports.HerdLedger
        Report HerdSummary: EventNames=[Activities].SummariseHerd.OnReportItemGenerated
          VariableNames:
            [Clock].Today
            [Activities].SummariseHerd.ReportDetails.Group as Class
            [Activities].SummariseHerd.ReportDetails.Breed as Breed
            [Activities].SummariseHerd.ReportDetails.Sex as Sex
            [Activities].SummariseHerd.ReportDetails.Number as Number
  Simulation Increase breeders
    Memo Description
      Herd management example
      # Increase female breeder numbers from breeding and purchases

      ## Activity
      Activities.Manage herd.Manage numbers (Ruminant activity manage)

      ## Properties

      - Perform growing out of young males as per last example
      - minimum breeder herd to 40 so purchases will be made from initial 20 till 40 individuals
      - maximum breeder herd to 60 where only herd replacement from breeding will increase herd from 40 to 60 breeders
      - maximum purchase as proportion of minimum breeders = 0.25 (40*0.25 = 10 individuals)
      - old breeders wil be sold at 120 months

      ## Initial herd
      - 20 female breeders and 2 male breeders

      ## Results
      - See BreederPurchase, BreederSales as category in HerdLedger report
      - The Herdsummary shows number in each class each month (plotted for breeders in Breeders graph)

      ### Number of breeders graph
      - The purchase of breeders happens in the first two years in the manage herd activity.
      - New breeders enter the herd from births via prebreeders
      - Purchases are limited to 10 individuals per year
      - Recruitment from the herd allows the number of breeders to increase to the maximum 60
      - The breeder herd is maintained through recriutment vs deaths and the sale of old breeders and excess breeders from 1975 onwards
      - As the population of breeders does not all below 40 there are not further purchases
    Clock: Start=1970-01-01; End=1980-01-31
      CLEMEvents: TimeStep=30; CustomTimeStep=0; EcologicalIndicatorsCalculationInterval=12; EcologicalIndicatorsCalculationMonth=7
    Summary summaryfile
    RandomNumberGenerator RandomNumbers: Seed=0
    ZoneCLEM CLEM: UserType=0; FarmMultiplier=1; DescriptiveSummaryFormatStyle=0; BuildTransactionCategoryFromTree=false; UseModelNameAsTransactionCategory=false; Area=0; Slope=0; AspectAngle=0; Altitude=50
      FileCrop FileForage: same as Increase herd at start.CLEM.FileForage
      ResourcesHolder Resources: same as Reduce herd at start.CLEM.Resources
      ActivitiesHolder Activities
        CropActivityManageCrop Native Pasture on farm: same as Grow out males.CLEM.Activities.Native Pasture on farm
        ActivityFolder Manage herd: OnPartialResourcesAvailableAction=0
          RuminantActivityGrow Grow all ruminants: EnergyGross=18.4; OnPartialResourcesAvailableAction=0; TransactionCategory=Livestock.Manage
          RuminantActivityMove Move to pasture: same as Increase herd at start.CLEM.Activities.Manage herd.Move to pasture
          RuminantActivityGrazeAll Graze all: HoursGrazed=8; TransactionCategory=Livestock.Grazing; OnPartialResourcesAvailableAction=2
          RuminantActivityManage Manage numbers: ManageFemaleBreederNumbers=true; PerformFemaleDestocking=true; PerformFemaleStocking=true; PerformMaleDestocking=true; PerformMaleStocking=true; MaximumBreedersKept=60; MinimumBreedersKept=40; MaxBreedersMultiplierToStop=10; MarkOldBreedersForSale=true; MaximumBreederAge={Parts=[10, 0, 0]}; MaximumProportionBreedersPerPurchase=0.25; ReturnPregnantMaxAgeToHerd=false; RetainFemaleReplacementBreedersFromSaleHerd=false; ManageMaleBreederNumbers=true; MaximumSiresKept=0.1; MarkOldSiresForSale=true; MaximumSireAge={Parts=[8, 0, 0]}; AllowSireReplacement=false; RestockSiresRelativeToBreeders=false; MaximumSiresPerPurchase=1; RetainMaleReplacementBreedersFromSaleHerd=false; GrowOutYoungMales=true; ContinuousGrowOutSales=false; MarkAgeWeightMalesForSale=true; CastrateMales=true; MaleSellingAge={Parts=[1, 6, 0]}; MaleSellingWeight=350; GrowOutYoungFemales=false; FemaleSellingAge={Parts=[2, 0, 0]}; FemaleSellingWeight=300; MarkAgeWeightFemalesForSale=false; GrazeFoodStoreNameSires=GrazeFoodStore.NativePasture; GrazeFoodStoreNameBreeders=GrazeFoodStore.NativePasture; GrazeFoodStoreNameGrowOutFemales=GrazeFoodStore.NativePasture; GrazeFoodStoreNameGrowOutMales=GrazeFoodStore.NativePasture; MinimumPastureBeforeRestock=1500; AdjustBreedingFemalesAtStartup=false; AdjustOthersToFemaleBreedersPropAtStartup=false; AdjustBreedingMalesAtStartup=false; TransactionCategory=Livestock.Manage; OnPartialResourcesAvailableAction=0
            ActivityTimerCalendar every August: same as Increase herd at start.CLEM.Activities.Manage herd.Manage numbers.every August
            SpecifyRuminant Breeders: same as Increase herd at start.CLEM.Activities.Manage herd.Manage numbers.Breeders
            SpecifyRuminant Sires: same as Increase herd at start.CLEM.Activities.Manage herd.Manage numbers.Sires
          RuminantActivityBreed Breed: same as Grow out males.CLEM.Activities.Manage herd.Breed
          RuminantActivityBuySell Sell: ActivityStyle=Arrange sales; BankAccountName=Finances.General account; TransactionCategory=Livestock.Manage; OnPartialResourcesAvailableAction=0
          RuminantActivityBuySell Buy: ActivityStyle=Arrange purchases; BankAccountName=Finances.General account; TransactionCategory=Livestock.Manage; OnPartialResourcesAvailableAction=0
        SummariseRuminantHerd SummariseHerd: GroupStyle=1; AddGroupByLocation=false; IncludeTotalColumn=false
      CLEMFolder Reports
        ReportActivitiesPerformed: IncludeFolders=true; HandleTimers=1; CreateHTML=false; RotateReport=false; AutoCreateHTML=false
        ReportResourceBalances (disabled): ResourceGroupsToReport=[GrazeFoodStore, AnimalFoodStore, Ruminants]; ReportAmount=true; ReportValue=false; ReportAnimalEquivalents=false; ReportAnimalWeight=false; ReportHerdTotals=false; ReportLandEntire=false; ReportLabourIndividuals=false
          VariableNames:
            Land
            GrazeFoodStore
            AnimalFoodStore
            Ruminants
        ReportResourceShortfalls (disabled): PropPastureShortfallOfDesiredIntake=0.03; EventNames=[Activities].ResourceShortfallOccurred
          VariableNames:
            [Clock].Today as Date
            [Activities].LastShortfallResourceRequest.ResourceTypeName as Resource
            [Activities].LastShortfallResourceRequest.ActivityModel.Name as Activity
            [Activities].LastShortfallResourceRequest.Reason as Reason
            [Activities].LastShortfallResourceRequest.Required as Required
            [Activities].LastShortfallResourceRequest.Available as Available
        ReportResourceLedger HerdLedger (disabled): ResourceGroupsToReport=Ruminants; ReportStyle=0; ReportLossesAsNegative=false; IncludePrice=false; IncludeFinancialYear=false; IncludeConversions=false; TransactionCategoryLevels=0; ReportRuminantAge=1; IncludeRuminantAE=false; IncludeRuminantBreed=false; IncludeRuminantCategory=true; IncludeRuminantChangeDirection=true; IncludeRuminantClass=true; IncludeRuminantID=false; IncludeRuminantLocation=false; IncludeRuminantRelatesTo=false; IncludeRuminantSex=true; IncludeRuminantWeight=false; IncludeRuminantGrowthRate=false; VariableNames=Ruminants
        Report HerdSummary (disabled): EventNames=[Activities].SummariseHerd.OnReportItemGenerated
          VariableNames:
            [Clock].Today
            [Activities].SummariseHerd.ReportDetails.Group as Class
            [Activities].SummariseHerd.ReportDetails.Breed as Breed
            [Activities].SummariseHerd.ReportDetails.Sex as Sex
            [Activities].SummariseHerd.ReportDetails.Number as Number
  Simulation Grow out females
    Memo Description
      Herd management example
      # Grow out and sell for age/weight any excess young females

      ## Activity
      Activities.Manage herd.Manage numbers (Ruminant activity manage)

      ## Properties

      - Perform growing out of young males as per previous example
      - Breeder herd management as per last example
      - Perform growing out of young females = true
      - Sell grow out females = true
      - Grow out females selling age = 24
      - Grow out female selling weight = 300
      * Note difference in age and weight criteria between males and females.

      ## Initial herd
      - 20 female breeders and 2 male breeders

      ## Results
      - The HerdLedger report (filter for rows with [#Class] = 'PreBreeder')
      - The PreBreeder entries appear from Aug 1972 when a prebreeder dies
      - In August 1976 the first group of female prebreeders in the growout herd are sold for age/weight sales.
      - The Herdsummary shows number in each class each month (plotted for prebreeders in PreBreeders graph)

      ### Number of breeders graph
      - The number of female PreBreeders fluctuates after 1972 based on individuals being sold when they reach age or weight, deaths and when returned to the herd to replace breeders as required.
    Clock: Start=1970-01-01; End=1980-01-31
      CLEMEvents: TimeStep=30; CustomTimeStep=0; EcologicalIndicatorsCalculationInterval=12; EcologicalIndicatorsCalculationMonth=7
    Summary summaryfile
    RandomNumberGenerator RandomNumbers: Seed=0
    ZoneCLEM CLEM: UserType=0; FarmMultiplier=1; DescriptiveSummaryFormatStyle=0; BuildTransactionCategoryFromTree=false; UseModelNameAsTransactionCategory=false; Area=0; Slope=0; AspectAngle=0; Altitude=50
      FileCrop FileForage: same as Increase herd at start.CLEM.FileForage
      ResourcesHolder Resources: same as Reduce herd at start.CLEM.Resources
      ActivitiesHolder Activities
        CropActivityManageCrop Native Pasture on farm: same as Grow out males.CLEM.Activities.Native Pasture on farm
        ActivityFolder Manage herd: OnPartialResourcesAvailableAction=0
          RuminantActivityGrow Grow all ruminants: EnergyGross=18.4; OnPartialResourcesAvailableAction=0; TransactionCategory=Livestock.Manage
          RuminantActivityMove Move to pasture: same as Increase herd at start.CLEM.Activities.Manage herd.Move to pasture
          RuminantActivityGrazeAll Graze all: HoursGrazed=8; TransactionCategory=Livestock.Grazing; OnPartialResourcesAvailableAction=2
          RuminantActivityManage Manage numbers: ManageFemaleBreederNumbers=true; PerformFemaleDestocking=true; PerformFemaleStocking=true; PerformMaleDestocking=true; PerformMaleStocking=true; MaximumBreedersKept=60; MinimumBreedersKept=40; MaxBreedersMultiplierToStop=10; MarkOldBreedersForSale=true; MaximumBreederAge={Parts=[10, 0, 0]}; MaximumProportionBreedersPerPurchase=0.25; ReturnPregnantMaxAgeToHerd=false; RetainFemaleReplacementBreedersFromSaleHerd=false; ManageMaleBreederNumbers=true; MaximumSiresKept=0.1; MarkOldSiresForSale=true; MaximumSireAge={Parts=[8, 0, 0]}; AllowSireReplacement=false; RestockSiresRelativeToBreeders=false; MaximumSiresPerPurchase=1; RetainMaleReplacementBreedersFromSaleHerd=false; GrowOutYoungMales=true; ContinuousGrowOutSales=false; MarkAgeWeightMalesForSale=true; CastrateMales=true; MaleSellingAge={Parts=[1, 6, 0]}; MaleSellingWeight=350; GrowOutYoungFemales=true; FemaleSellingAge={Parts=[2, 0, 0]}; FemaleSellingWeight=300; MarkAgeWeightFemalesForSale=true; GrazeFoodStoreNameSires=GrazeFoodStore.NativePasture; GrazeFoodStoreNameBreeders=GrazeFoodStore.NativePasture; GrazeFoodStoreNameGrowOutFemales=GrazeFoodStore.NativePasture; GrazeFoodStoreNameGrowOutMales=GrazeFoodStore.NativePasture; MinimumPastureBeforeRestock=1500; AdjustBreedingFemalesAtStartup=false; AdjustOthersToFemaleBreedersPropAtStartup=false; AdjustBreedingMalesAtStartup=false; TransactionCategory=Livestock.Manage; OnPartialResourcesAvailableAction=0
            ActivityTimerCalendar every August: same as Increase herd at start.CLEM.Activities.Manage herd.Manage numbers.every August
            SpecifyRuminant Breeders: same as Increase herd at start.CLEM.Activities.Manage herd.Manage numbers.Breeders
            SpecifyRuminant Sires: same as Increase herd at start.CLEM.Activities.Manage herd.Manage numbers.Sires
          RuminantActivityBreed Breed: same as Grow out males.CLEM.Activities.Manage herd.Breed
          RuminantActivityBuySell Sell: ActivityStyle=Arrange sales; BankAccountName=Finances.General account; TransactionCategory=Livestock.Manage; OnPartialResourcesAvailableAction=0
          RuminantActivityBuySell Buy: ActivityStyle=Arrange purchases; BankAccountName=Finances.General account; TransactionCategory=Livestock.Manage; OnPartialResourcesAvailableAction=0
        SummariseRuminantHerd SummariseHerd: GroupStyle=1; AddGroupByLocation=false; IncludeTotalColumn=false
      CLEMFolder Reports
        ReportActivitiesPerformed: IncludeFolders=true; HandleTimers=1; CreateHTML=false; RotateReport=false; AutoCreateHTML=false
        ReportResourceBalances: same as Increase herd at start.CLEM.Reports.ReportResourceBalances
        ReportResourceShortfalls: same as Increase herd at start.CLEM.Reports.ReportResourceShortfalls
        ReportResourceLedger HerdLedger: same as Increase herd at start.CLEM.Reports.HerdLedger
        Report HerdSummary: same as Grow out males.CLEM.Reports.HerdSummary
  Simulation Sell breeder rules
    Memo Description
      Herd management example
      # Rules for selling breeders

      ## Activity
      Activities.Manage herd.Manage numbers (Ruminant activity manage)

      ## Properties

      - As per Increase breeder example

      ## additional components
      - Added a Ruminant Group below the Manage ruminants activity with a RemoveFemaleBreeders style
      - Added filters below the ruminant group
      -- IsBreeder FilterByProperty -> Female.IsBreeder IsTrue
      -- AgeDescending SortByProperty -> Age descending
      -- TakeFive TakeFromFilter -> Individuals, 5, from start

      ## Initial herd
      - 20 female breeders and 2 male breeders

      ## Results
      -
    Clock: Start=1970-01-01; End=1980-01-31
      CLEMEvents: TimeStep=30; CustomTimeStep=0; EcologicalIndicatorsCalculationInterval=12; EcologicalIndicatorsCalculationMonth=7
    Summary summaryfile
    RandomNumberGenerator RandomNumbers: Seed=0
    ZoneCLEM CLEM: UserType=0; FarmMultiplier=1; DescriptiveSummaryFormatStyle=0; BuildTransactionCategoryFromTree=false; UseModelNameAsTransactionCategory=false; Area=0; Slope=0; AspectAngle=0; Altitude=50
      FileCrop FileForage: same as Increase herd at start.CLEM.FileForage
      ResourcesHolder Resources: same as Reduce herd at start.CLEM.Resources
      ActivitiesHolder Activities
        CropActivityManageCrop Native Pasture on farm: same as Grow out males.CLEM.Activities.Native Pasture on farm
        ActivityFolder Manage herd: OnPartialResourcesAvailableAction=0
          RuminantActivityGrow Grow all ruminants: EnergyGross=18.4; OnPartialResourcesAvailableAction=0; TransactionCategory=Livestock.Manage
          RuminantActivityMove Move to pasture: same as Increase herd at start.CLEM.Activities.Manage herd.Move to pasture
          RuminantActivityGrazeAll Graze all: HoursGrazed=8; TransactionCategory=Livestock.Grazing; OnPartialResourcesAvailableAction=2
          RuminantActivityManage Manage numbers: ManageFemaleBreederNumbers=true; PerformFemaleDestocking=true; PerformFemaleStocking=true; PerformMaleDestocking=true; PerformMaleStocking=true; MaximumBreedersKept=60; MinimumBreedersKept=40; MaxBreedersMultiplierToStop=10; MarkOldBreedersForSale=true; MaximumBreederAge={Parts=[10, 0, 0]}; MaximumProportionBreedersPerPurchase=0.25; ReturnPregnantMaxAgeToHerd=false; RetainFemaleReplacementBreedersFromSaleHerd=false; ManageMaleBreederNumbers=true; MaximumSiresKept=0.1; MarkOldSiresForSale=true; MaximumSireAge={Parts=[8, 0, 0]}; AllowSireReplacement=false; RestockSiresRelativeToBreeders=false; MaximumSiresPerPurchase=1; RetainMaleReplacementBreedersFromSaleHerd=false; GrowOutYoungMales=true; ContinuousGrowOutSales=false; MarkAgeWeightMalesForSale=true; CastrateMales=true; MaleSellingAge={Parts=[1, 6, 0]}; MaleSellingWeight=350; GrowOutYoungFemales=false; FemaleSellingAge={Parts=[2, 0, 0]}; FemaleSellingWeight=300; MarkAgeWeightFemalesForSale=false; GrazeFoodStoreNameSires=GrazeFoodStore.NativePasture; GrazeFoodStoreNameBreeders=GrazeFoodStore.NativePasture; GrazeFoodStoreNameGrowOutFemales=GrazeFoodStore.NativePasture; GrazeFoodStoreNameGrowOutMales=GrazeFoodStore.NativePasture; MinimumPastureBeforeRestock=1500; AdjustBreedingFemalesAtStartup=true; AdjustOthersToFemaleBreedersPropAtStartup=false; AdjustBreedingMalesAtStartup=true; TransactionCategory=Livestock.Manage; OnPartialResourcesAvailableAction=0
            ActivityTimerCalendar every August: same as Increase herd at start.CLEM.Activities.Manage herd.Manage numbers.every August
            SpecifyRuminant Breeders: same as Increase herd at start.CLEM.Activities.Manage herd.Manage numbers.Breeders
            SpecifyRuminant Sires: same as Increase herd at start.CLEM.Activities.Manage herd.Manage numbers.Sires
            RuminantGroup FiveOldestBreeders: RandomiseBeforeSorting=false; Identifier=RemoveBreedersFromHerd
              FilterByProperty IsBreeder: PropertyOfIndividual=Female.IsPreBreeder; Operator=83
              SortByProperty AgeDescending: PropertyOfIndividual=Age; SortDirection=1
              TakeFromFiltered TakeFive: TakeStyle=1; TakePositionStyle=0; Value=5
          RuminantActivityBreed Breed: same as Grow out males.CLEM.Activities.Manage herd.Breed
          RuminantActivityBuySell Sell: ActivityStyle=Arrange sales; BankAccountName=Finances.General account; TransactionCategory=Livestock.Manage; OnPartialResourcesAvailableAction=0
          RuminantActivityBuySell Buy: ActivityStyle=Arrange purchases; BankAccountName=Finances.General account; TransactionCategory=Livestock.Manage; OnPartialResourcesAvailableAction=0
        SummariseRuminantHerd SummariseHerd: GroupStyle=1; AddGroupByLocation=false; IncludeTotalColumn=false
      CLEMFolder Reports
        ReportActivitiesPerformed: IncludeFolders=true; HandleTimers=1; CreateHTML=false; RotateReport=false; AutoCreateHTML=false
        ReportResourceBalances: same as Increase herd at start.CLEM.Reports.ReportResourceBalances
        ReportResourceShortfalls: same as Increase herd at start.CLEM.Reports.ReportResourceShortfalls
        ReportResourceLedger HerdLedger: same as Increase herd at start.CLEM.Reports.HerdLedger
        Report HerdSummary: same as Grow out males.CLEM.Reports.HerdSummary
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