Simulations: Version=218
  DataStore
  Simulation RuminantFilters
    Memo Simulation information
      # Filtering ruminants example

      By changing the filters in the Activities.ReportHerd this simulation will report all individuals that match in the Reports.Report
      Add and change the filters in the filter group below the ReportHerd component in Activities to define which individuals are selected.
      A range of filters are provided and all disabled. Right click a filter and enable to include the filter in the simulation.
      You can also add sort and take components.

      ## Initial Herd by each individual created
      - 1 Suckling 2month Female GenoIndex and GenoA attributes
      - 2 Suckling 2month Male
      - 3 Suckling 2month Male
      - 4 Heifer Female 12month
      - 5 Female 24month GenoIndex
      - 6 Female 36month (cohort of 4)
      - 7 Female 36month
      - 8 Female 36month
      - 9 Female 36month
      - 10 Male 12month
      - 11 Male 24month
      - 12 Male 36month
      - 13 Male 36month Sire GenoA
    Memo Results
      # Checks completed

      ## No filters with sort and take tests
      * No filters (return all individuals) OK
      *  SortByProperty Age ascending OK
      * SortByProprty weight descending OK
      * TakeFromFiltered Proportion = 0.5 (50%) OK
      * TakeFromFiltered Individuals = 3 OK

      ## Filter by attributes

      * FilterByAttribute for genetics GenoIndex exists OK
      * FilterByAttribute for genetics GenoIndex value > 60 OK
      * FilterByAttribute for genetics GenoIndex value > 60 AND GenoA exists OK

      ## Filter by property

      * FilterByProperty boolean IsSire OK
      * FilterByProperty enum Sex is Male OK
      * FilterByProperty number Age < 12 OK

      ## Sort by attribute

      * SortByAttribute GenoIndex exists descending OK
      * SortByAttribute GenoIndex value descending with -9999 for those missing the attribute OK

      ## Failed filter check

      * FilterByProperty a male (IsSire) and female (IsLactating) based property OK - NO RESULTS

      ### Other hard coded checks performed
      * Filter a list of female ruminants by a female property (IsHeifer) OK - 3 ind weaned and not preg at startup returned
      * Filter a list of female ruminants by a male property (IsSire) OK - NO RESULTS
    Clock: Start=2000-08-01; End=2000-08-30
      CLEMEvents: TimeStep=30; CustomTimeStep=0; EcologicalIndicatorsCalculationInterval=12; EcologicalIndicatorsCalculationMonth=7
    Summary summaryfile
    RandomNumberGenerator RandomNumbers: Seed=0
    ZoneCLEM CLEM: UserType=0; FarmMultiplier=1; DescriptiveSummaryFormatStyle=0; BuildTransactionCategoryFromTree=false; UseModelNameAsTransactionCategory=false; Area=0; Slope=0; AspectAngle=0; Altitude=50
      ResourcesHolder Resources
        RuminantHerd Ruminants: TransactionStyle=0
          RuminantType Bos indicus
            RuminantInitialCohorts Initial cohorts NoTrend: WeightWarningOccurred=false; ManagedPastureName=Not specified
              RuminantTypeCohort suckling F GenoIndex GenoA: Sex=0; AgeDetails={Parts=[0, 2, 0]}; AgeSD=0; Number=1; Weight=0; WeightSD=0; InitialFatProteinStyle=4; Suckling=true; Sire=false; ProportionFleecePresent=0; ManagedPastureName=Not specified
                SetAttributeWithValue GenoIndex: AttributeName=GenoIndex; Category=0; Value=50; MinimumValue=-100; MaximumValue=200; StandardDeviation=20; UseStandardDeviationSign=false; InheritanceStyle=35; GenotypeStandardDeviation=0; Mandatory=false
                SetAttributeWithValue GenoA: AttributeName=GenoA; Category=0; Value=50; MinimumValue=-100; MaximumValue=200; StandardDeviation=20; UseStandardDeviationSign=false; InheritanceStyle=35; GenotypeStandardDeviation=0; Mandatory=false
              RuminantTypeCohort suckling M 2: Sex=1; AgeDetails={Parts=[0, 2, 0]}; AgeSD=0; Number=2; Weight=0; WeightSD=0; InitialFatProteinStyle=4; Suckling=true; Sire=false; ProportionFleecePresent=0; ManagedPastureName=Not specified
              RuminantTypeCohort Heifer 14: Sex=0; AgeDetails={Parts=[1, 2, 0]}; AgeSD=0; Number=1; Weight=0; WeightSD=0; InitialFatProteinStyle=4; Suckling=false; Sire=false; ProportionFleecePresent=0; ManagedPastureName=Not specified
              RuminantTypeCohort Female 24: Sex=0; AgeDetails={Parts=[2, 0, 0]}; AgeSD=0; Number=1; Weight=0; WeightSD=0; InitialFatProteinStyle=4; Suckling=false; Sire=false; ProportionFleecePresent=0; ManagedPastureName=Not specified
              RuminantTypeCohort Female 36 4: Sex=0; AgeDetails={Parts=[3, 0, 0]}; AgeSD=0; Number=6; Weight=0; WeightSD=0; InitialFatProteinStyle=4; Suckling=false; Sire=false; ProportionFleecePresent=0; ManagedPastureName=Not specified
                SetAttributeWithValue GenoIndex: AttributeName=GenoIndex; Category=0; Value=50; MinimumValue=-100; MaximumValue=200; StandardDeviation=20; UseStandardDeviationSign=false; InheritanceStyle=35; GenotypeStandardDeviation=0; Mandatory=false
              RuminantTypeCohort Male 12: Sex=1; AgeDetails={Parts=[0, 12, 0]}; AgeSD=0; Number=1; Weight=0; WeightSD=0; InitialFatProteinStyle=4; Suckling=false; Sire=false; ProportionFleecePresent=0; ManagedPastureName=Not specified
              RuminantTypeCohort Male 24: Sex=1; AgeDetails={Parts=[2, 0, 0]}; AgeSD=0; Number=1; Weight=0; WeightSD=0; InitialFatProteinStyle=4; Suckling=false; Sire=false; ProportionFleecePresent=0; ManagedPastureName=Not specified
              RuminantTypeCohort Male 36: Sex=1; AgeDetails={Parts=[3, 0, 0]}; AgeSD=0; Number=1; Weight=0; WeightSD=0; InitialFatProteinStyle=4; Suckling=false; Sire=false; ProportionFleecePresent=0; ManagedPastureName=Not specified
                SetAttributeWithValue GenoA: AttributeName=GenoA; Category=0; Value=50; MinimumValue=-100; MaximumValue=200; StandardDeviation=20; UseStandardDeviationSign=false; InheritanceStyle=35; GenotypeStandardDeviation=0; Mandatory=false
              RuminantTypeCohort Sire GenoA: Sex=1; AgeDetails={Parts=[3, 0, 0]}; AgeSD=0; Number=1; Weight=0; WeightSD=0; InitialFatProteinStyle=4; Suckling=false; Sire=true; ProportionFleecePresent=0; ManagedPastureName=Not specified
                SetAttributeWithValue GenoA: AttributeName=GenoA; Category=0; Value=50; MinimumValue=-100; MaximumValue=200; StandardDeviation=20; UseStandardDeviationSign=false; InheritanceStyle=35; GenotypeStandardDeviation=0; Mandatory=false
            RuminantParametersHolder Parameters1: DisplaySummaryParameters=true
              RuminantParametersBreeding Breeding: OestrusCycleLength=20; DaysInHeat=2; ProportionOffspringMale=0.5; DaysLastBirthToStartOestrus=20; MaximumMaleMatingsPerDay=30; AllowFreemartins=false; ConceptionDuringLactationProbability=1; DystociaCoefficients=[0, 0]
              RuminantParametersGeneral General: Breed=Bos taurus; NaturalWeaningAge={Parts=[0]}; MinimumSizeForMaturityFemale=0.6; MinimumSizeForMaturityMale=0.6; GestationLength={Parts=[0, 9, 0]}; MultipleBirthRate=[0]; SRWFemale=460; SRWCastrateMaleMultiplier=1.2; SRWMaleMultiplier=1.4; BirthScalar=[0.07, 0.07]; EffectRelativeSizeBirthWeight_CP4=0.33; BaseAnimalEquivalent=450; RelBCToScoreRate=0.15; BCScoreRange=[0, 3, 5]; ProportionEBWFatFemale=0.25; ProportionEBWFatMale=0.25; ProportionEBWFatMax=0.45; GutFillMinimum=0.04; AgeGrowthRateCoefficientProvisionStyle=0; AgeGrowthRateCoefficient_CN1=0.015; CN1EstimatedWeaningWeight=0; CN1EstimatedWeaningAge={Parts=[0]}; SRWGrowthScalar_CN2=0.27; SlowGrowthFactor_CN3=0.4; MJEnergyPerKgFat=39.3; MJEnergyPerKgProtein=23.6; IncludeWool=false
              RuminantParametersGrazing Grazing: GreenDietMax=0.98; GreenDietCoefficient=0.15; GreenDietZero=0.04; IntakeCoefficientBiomass=0.01; StrictFeedingLimits=true
              RuminantParametersGrow GrowParams: MortalityBase=0.03; GrowthEnergyIntercept1=6.7; GrowthEnergyIntercept2=20.3; EMaintEfficiencyCoefficient=0.368; EMaintEfficiencyIntercept=0.503; EGrowthEfficiencyCoefficient=0.79; EGrowthEfficiencyIntercept=0; ELactationEfficiencyCoefficient=0.35; ELactationEfficiencyIntercept=0.42; EMaintExponent=8.2e-05; EMaintIntercept=0.09; EMaintCoefficient=0.26; EnergyMaintenanceMaximumAge={Parts=[6, 0, 0]}; Kme=1.2; GrowthEfficiency=1; IntakeCoefficient=0.02425; IntakeIntercept=1.7; ProteinCoefficient=130; ProteinDegradability=0.9; MilkIntakeCoefficient=0.1206; MilkIntakeIntercept=3.8146; MilkIntakeMaximum=20; MilkLWTFodderSubstitutionProportion=0.2; MaxJuvenileIntake=0.03; ProportionalDiscountDueToMilk=0.3; WoolCoefficient=0; CashmereCoefficient=0; LactatingPotentialModifierConstantA=0.32; LactatingPotentialModifierConstantB=61; LactatingPotentialModifierConstantC=1.7
              RuminantParametersGrowPF GrowPFParams
                RuminantParametersGrowPFCACRD CACRD: RumenDegradabilityIntercept_CRD1=0.3; RumenDegradabilitySlope_CRD2=0.25; RumenDegradabilityConcentrateSlope_CRD3=0.1; RumenDegradableProteinIntercept_CRD4=0.007; RumenDegradableProteinSlope_CRD5=0.005; RumenDegradableProteinExponent_CRD6=0.35; ProteinShortfallAlleviationScalar=0.5; MilkProteinDigestibility_CA5=0.92; MicrobialProteinDigestibility_CA7=0.6; FaecalProteinFromMCP_CA8=0.25
                RuminantParametersGrowPFCD CD: BasalMortalityRate_CD1=5.53e-05; EffectBCOnMortality1_CD2=0.3; EffectBCOnMortality2_CD3=0.6; CriticalFatToEBMForSurvival=0.05; RelativeDifferenceWeightDyingIndividuals_CD12=0.1; UpperLimitForMortalityInWeaners_CD13=0.0001
                RuminantParametersGrowPFCG CG: EfficiencyOfDPLSUseForWool_CG1=0.6; EfficiencyOfDPLSUseFromFeed_CG2=0.7; EfficiencyOfDPLSUseFromMilk_CG3=0.8; GainCurvature_CG4=6; GainMidpoint_CG5=0.4; ConditionNoEffect_CG6=0.9; ConditionMaxEffect_CG7=0.97; GrowthEnergyIntercept1_CG8b=6.7; GrowthEnergyIntercept2_CG9=16.5; GrowthEnergySlope1_CG10=2; GrowthEnergySlope2_CG11=13.8; ProteinGainIntercept1_CG12b=0.21; ProteinGainIntercept2_CG13=0.12; ProteinGainSlope1_CG14b=0.004; ProteinGainSlope2_CG15=0.115; BreedGrowthEfficiencyScalar=1; BreedLactationEfficiencyScalar=1; BreedMainenanceEfficiencyScalar=1; ProteinContentOfFatFreeTissueGainWetBasis=0.21; ProteinContentOfFatFreeTissueGainWetBasisAtBirth=0.1373; DaysUntilStandardProteinContentOfFatFreeTissueGainWetBasis=30; DietaryProteinEnergyReleaseEfficiency=0.5; DietaryProteinEnergyReleaseEfficiencyWhenNetEnergyDeficit=0.8; FatPercentToProportionEDeficitTakenFromBodyFatIntercept=0.875; FatPercentToProportionEDeficitTakenFromBodyFatSlope=0.033
                RuminantParametersGrowPFCI CI: IntakeReductionFromInsufficientRDPIntake=0.5; IgnoreFeedQualityIntakeAdjustment=true; RelativeSizeScalar_CI1=0.025; RelativeSizeQuadratic_CI2=1.7; RumenDevelopmentCurvature_CI3=0.22; RumenDevelopmentAge_CI4=60; PeakLactationIntakeDay_CI8=62; LactationResponseCurvature_CI9=1.7; EffectLevelsMilkProdOnIntake_CI10=0.6; BasalMilkRelSRW_CI11=0.05; LactationConditionLossAdjustment_CI12=0.15; LactationConditionLossThreshold_CI13=0.005; LactationConditionLossThresholdDecay_CI14=0.002; ConditionAtParturitionAdjustment_CI15=0.5; PeakLactationIntakeLevel_CI19=[0.416, 0.416]; RelativeConditionEffect_CI20=1.5; DigestibilityPeak_CR1=0.8; DigestibilitySlope_CR3=1.25; QualityIntakeSubsititutionFactorNonLactating_CR11=10.5; QualityIntakeSubsititutionFactorLactating_CR20=11.5; MethaneEmissionsParameter1=0.0184; MethaneEmissionsParameter2=13; MethaneEmissionsParameter3=7.52; MethaneEmissionsParameter4=23.7; MethaneEmissionsParameter5=3.36
                RuminantParametersGrowPFCKCL CKCL: ELactationEfficiencyIntercept_CK5=0.4; ELactationEfficiencyCoefficient_CK6=0.02; ExpectedPeakYield=20; PeakYieldScalar_CL0=[0.375, 0.375]; MetabolisabilityOfMilk_CL5=0.94; EnergyContentMilk_CL6=3.1; LactationEnergyDeficit_CL7=1.17; MilkConsumptionLimit1_CL12=0.42; MilkConsumptionLimit2_CL13=0.58; MilkConsumptionLimit3_CL14=0.036; ProteinPercentMilk_CL15=3.2; AdjustmentOfPotentialYieldReduction_CL16=0.7; PotentialYieldReduction_CL17=0.01; PotentialYieldReduction2_CL18=0.1; PotentialLactationYieldParameter_CL19=1.6; PotentialYieldMEIEffect_CL20=4; PotentialYieldLactationEffect_CL21=0.004; PotentialYieldLactationEffect2_CL22=0.006; PotentialYieldConditionEffect_CL23=3; PotentialYieldConditionEffect2_CL24=0.6
                RuminantParametersGrowPFCM CM: HPVisceraFL_CM1=0.09; FHPScalar_CM2=0.31; MainExponentForAge_CM3=8e-05; AgeEffectMin_CM4=0.84; MilkScalar_CM5=0.23; GrazingEnergyFromMetabolicScalar_CM6=0.0025; EFPFromMilkDiet_CM11=0.000526; BreedEUPFactor1_CM12=0.012; BreedEUPFactor2_CM13=0.0338; DermalLoss_CM14=0.00011
                RuminantParametersGrowPFCP CP: FetalNormWeightParameter_CP2=2.2; FetalNormWeightParameter2_CP3=1.77; EffectFetalRelativeSizeOnBirthWeight_CP4=0.33; ConceptusWeightRatio_CP5=1.8; ConceptusWeightParameter_CP6=2.42; ConceptusWeightParameter2_CP7=1.16; ConceptusEnergyContent_CP8=4.11; ConceptusEnergyParameter_CP9=343.5; ConceptusEnergyParameter2_CP10=0.0164; ConceptusProteinContent_CP11=0.134; ConceptusProteinParameter_CP12=6.22; ConceptusProteinParameter2_CP13=0.747; FetalGrowthPoorCondition_CP14=[1, 1.15]; ToxaemiaCoefficients=[0, 0]
              RuminantParametersGrowMortality Mortality: MortalityCoefficient=2.5; MortalityIntercept=0.05; MortalityExponent=3; JuvenileMortalityCoefficient=3; JuvenileMortalityMaximum=0.2; JuvenileMortalityExponent=1.8
              RuminantParametersLactation: MilkingDays=300; MilkPeakYield=4; MilkCurveSuckling_CL3=0.6; MilkCurveNonSuckling_CL4=0.11; MilkOffsetDay=4; MilkPeakDay=30
      ActivitiesHolder Activities
        ReportRuminantHerd ReportHerd: ReportAtStart=true; WithinTimeStepTiming=1
          RuminantGroup: RandomiseBeforeSorting=false
            FilterByProperty FilterByPropertyIsPregnant (disabled): PropertyOfIndividual=Female.IsPregnant; Operator=13; Value=True
            FilterByAttribute FilterByGenoIndexGT50 (disabled): AttributeTag=GenoIndex; FilterStyle=0; Operator=15; Value=50
            FilterByAttribute FilterByGenoIndexExists (disabled): AttributeTag=GenoIndex; FilterStyle=1; Operator=13; Value=true
            FilterByAttribute FilterByGenoA (disabled): AttributeTag=GenoA; FilterStyle=1; Operator=83
            FilterByProperty FilterByHeifer (disabled): PropertyOfIndividual=Female.IsHeifer; Operator=83
            SortByProperty (disabled): PropertyOfIndividual=Weight; SortDirection=1
            TakeFromFiltered TakeFromFilteredProportion (disabled): TakeStyle=0; TakePositionStyle=1; Value=0.5
            TakeFromFiltered TakeFromFilteredIndividuals (disabled): TakeStyle=1; TakePositionStyle=0; Value=3
            FilterByProperty FilterBySires (disabled): PropertyOfIndividual=Male.IsSire; Operator=13; Value=true
            FilterByProperty FilterByMales (disabled): PropertyOfIndividual=Sex; Operator=13; Value=Male
            FilterByProperty FilterByAgeLess12 (disabled): PropertyOfIndividual=AgeInYears; Operator=20; Value=1
            FilterByProperty FilterByLactating (disabled): PropertyOfIndividual=Female.IsLactating; Operator=13; Value=true
            SortByAttribute SortByAttributeGenoIndexExists (disabled): AttributeTag=GenoIndex; FilterStyle=1; SortDirection=1; MissingAttributeValue=false
            SortByAttribute SortByAttributeGenoIndexValue (disabled): AttributeTag=GenoIndex; FilterStyle=0; SortDirection=0; MissingAttributeValue=-9999
            FilterByProperty FilterByAbleToBreed (disabled): PropertyOfIndividual=IsAbleToBreed; Operator=13; Value=true
            SortRandom (disabled): SortDirection=0
        RuminantActivityGrow: EnergyGross=18.4; OnPartialResourcesAvailableAction=0
      CLEMFolder Reports
        ReportResourceLedger HerdLedger: ResourceGroupsToReport=Ruminants; ReportStyle=0; ReportLossesAsNegative=false; IncludePrice=false; IncludeFinancialYear=false; IncludeConversions=false; TransactionCategoryLevels=0; ReportRuminantAge=0; IncludeRuminantAE=false; IncludeRuminantBreed=false; IncludeRuminantCategory=false; IncludeRuminantChangeDirection=false; IncludeRuminantClass=false; IncludeRuminantID=false; IncludeRuminantLocation=false; IncludeRuminantRelatesTo=false; IncludeRuminantSex=false; IncludeRuminantWeight=false; IncludeRuminantGrowthRate=false; VariableNames=Ruminants
        Report: EventNames=[ReportHerd].OnReportItemGenerated
          VariableNames:
            [Clock].Today as Date
            [ReportHerd].ReportDetails.Individual.ID as ID
            [ReportHerd].ReportDetails.Individual.Sex as Sex
            [ReportHerd].ReportDetails.Individual.AgeInYears as Age
            [ReportHerd].ReportDetails.Individual.Weight.Live as Weight
            [ReportHerd].ReportDetails.Individual.Attributes.Exists("GenoIndex") as GenoIndexExists
            [ReportHerd].ReportDetails.Individual.IsAbleToBreed as AbleToBreed
