Simulations: Version=152
  DataStore
  Memo Details
    # CLEM herd management examples

    The following simulations provide an example of each of the tasks performed in the RuminantActivityManage activity. You can use these examples to explore the model and check that the model is working as expected.

    Each example will build on the previous example until a managed herd is provided. For example we need to include the growing out (or at least sales) of young males to maintain the herd size, so this example is included in the breeder management example.

    ## Help
    The CLEM help system provides a model overview, user guide (how to) and a full description of every CLEM component, as well as in depth discussions on modelling various farm systems and what components to use. The Help documentation can be accessed by clicking the Help button beside the component name in the right hand information pane after selecting any CLEM component from your simulation tree or at [CLEM Help online](http://www.apsim.info/CLEM/Content/Home.htm).
  Simulation Increase herd at start
    Memo Description
      Herd management example
      # Increase male and female breeders at start of simulation

      ## Activity
      Activities.Manage herd.Manage numbers (Ruminant activity manage)

      ## Properties
      in Properties tab - Statup category
      - adjust female breeding numbers at start up = True
      - adjust male breeding numbers at start up = True

      in Properties tab - Herd size category
      - maximum number of breeders = 40
      - maximum sires kept = 0.1 (10% of max breeders)

      ## Initial herd
      - 20 female breeders and 2 male breeders
      - 5 Females age 24 months
      - 10 Females age 36 months
      - 5 Females age 48 months
      - 2 Males age 42 and sires

      ## Results
      - See category FillInitialHerd entries in HerdLedger report
      - See herd size in first month in HerdSummary report
    Clock: Start=1970-01-01; End=1970-01-31
    Summary summaryfile
    RandomNumberGenerator RandomNumbers: Seed=0; Iteration=0
    ZoneCLEM CLEM: FarmMultiplier=1; ClimateRegion=0; EcologicalIndicatorsCalculationInterval=12; EcologicalIndicatorsCalculationMonth=12; BuildTransactionCategoryFromTree=false; UseModelNameAsTransactionCategory=false; Area=0; Slope=0; AspectAngle=0; Altitude=50
      FileCrop FileForage: FileName=%root%\Examples\CLEM\FileForage.prn; CropNameColumnName=CropName; SoilTypeColumnName=SoilNum; YearColumnName=Year; MonthColumnName=Month; AmountColumnName=AmtKg
      ResourcesHolder Resources
        Land: UnitsOfArea=hectares; UnitsOfAreaToHaConversion=1
          LandType Paddock1: LandArea=250; PortionBuildings=0; ProportionOfTotalArea=1; SoilType=2
        Finance Finances: FirstMonthOfFinancialYear=7
          FinanceType General account: OpeningBalance=100000; EnforceWithdrawalLimit=false; WithdrawalLimit=0; InterestRateCharged=7.5; InterestRatePaid=2
        RuminantHerd Ruminants: TransactionStyle=0
          RuminantType Bos indicus: Breed=Bos indicus; EMaintEfficiencyCoefficient=0.35; EMaintEfficiencyIntercept=0.503; EGrowthEfficiencyCoefficient=0.79; EGrowthEfficiencyIntercept=0; ELactationEfficiencyCoefficient=0.35; ELactationEfficiencyIntercept=0.42; EMaintExponent=8.2e-05; EMaintIntercept=0.09; EMaintCoefficient=0.26; EnergyMaintenanceMaximumAge=6; Kme=1; GrowthEnergyIntercept1=6.7; GrowthEnergyIntercept2=20.3; GrowthEfficiency=1.09; NaturalWeaningAge=0; SRWFemale=500; SRWMaleMultiplier=1.2; SRWBirth=0.08; AgeGrowthRateCoefficient=0.0115; SRWGrowthScalar=0.32; IntakeCoefficient=0.024; IntakeIntercept=1.7; OverfeedPotentialIntakeModifier=1; ProteinCoefficient=120; ProteinDegradability=0.9; BaseAnimalEquivalent=450; GreenDietMax=0.98; GreenDietCoefficient=0.15; GreenDietZero=0.04; IntakeCoefficientBiomass=0.006; StrictFeedingLimits=true; MilkIntakeCoefficient=0.1206; MilkIntakeIntercept=3.8146; MilkIntakeMaximum=20; MilkLWTFodderSubstitutionProportion=0.2; MaxJuvenileIntake=0.035; ProportionalDiscountDueToMilk=0.3; ProportionOfMaxWeightToSurvive=0.5; LactatingPotentialModifierConstantA=0.42; LactatingPotentialModifierConstantB=61; LactatingPotentialModifierConstantC=1.7; MaximumSizeOfIndividual=1.2; MortalityBase=0.03; MortalityCoefficient=2.5; MortalityIntercept=0.05; MortalityExponent=3; JuvenileMortalityCoefficient=3; JuvenileMortalityMaximum=0.2; JuvenileMortalityExponent=1.8; WoolCoefficient=0; CashmereCoefficient=0; MilkCurveSuckling=0.6; MilkCurveNonSuckling=0.11; MilkingDays=300; MilkPeakYield=20; MilkOffsetDay=4; MilkPeakDay=45; ProportionOffspringMale=0.5; InterParturitionIntervalIntercept=10.847; InterParturitionIntervalCoefficient=-0.7994; GestationLength=9; MinimumAge1stMating=24; MinimumSize1stMating=0.5; MinimumDaysBirthToConception=61; CriticalCowWeight=0.5; MaximumMaleMatingsPerDay=30; PrenatalMortality=0.079; MethaneProductionCoefficient=20.7
            RuminantInitialCohorts Initial cohorts: WeightWarningOccurred=true
              RuminantTypeCohort Female24: Sex=0; Age=24; Number=5; Weight=400; WeightSD=0; Suckling=false; Sire=false
              RuminantTypeCohort Female36: Sex=0; Age=36; Number=10; Weight=520; WeightSD=0; Suckling=false; Sire=false
              RuminantTypeCohort Female48: Sex=0; Age=48; Number=5; Weight=520; WeightSD=0; Suckling=false; Sire=false
              RuminantTypeCohort Male42: Sex=1; Age=42; Number=2; Weight=610; WeightSD=0; Suckling=false; Sire=true
            AnimalPricing Prices
              AnimalPriceGroup Weaners_LT_12m: PricingStyle=1; Value=2.5; PurchaseOrSale=0; RandomiseBeforeSorting=false
                FilterByProperty LT_12m: PropertyOfIndividual=Age; Operator=20; Value=12
              AnimalPriceGroup Female1_3_Buy: PricingStyle=1; Value=2.3; PurchaseOrSale=1; RandomiseBeforeSorting=false
                FilterByProperty Female: PropertyOfIndividual=Sex; Operator=13; Value=Female
                FilterByProperty less36months: PropertyOfIndividual=Age; Operator=20; Value=36
              AnimalPriceGroup Female1_3_Sell: PricingStyle=1; Value=2.5; PurchaseOrSale=2; RandomiseBeforeSorting=false
                FilterByProperty Female: PropertyOfIndividual=Sex; Operator=13; Value=Female
                FilterByProperty less36months: PropertyOfIndividual=Age; Operator=20; Value=36
              AnimalPriceGroup Female 3plus: PricingStyle=1; Value=2.2; PurchaseOrSale=0; RandomiseBeforeSorting=false
                FilterByProperty Female: PropertyOfIndividual=Sex; Operator=13; Value=Female
                FilterByProperty 36months: PropertyOfIndividual=Age; Operator=16; Value=36
              AnimalPriceGroup Breeding Sires: PricingStyle=1; Value=2.2; PurchaseOrSale=0; RandomiseBeforeSorting=false
                FilterByProperty isSire: PropertyOfIndividual=Male.IsSire; Operator=83
              AnimalPriceGroup Male1_3: PricingStyle=1; Value=2.5; PurchaseOrSale=0; RandomiseBeforeSorting=false
                FilterByProperty Male: PropertyOfIndividual=Sex; Operator=13; Value=Male
                FilterByProperty less36months: PropertyOfIndividual=Age; Operator=20; Value=36
              AnimalPriceGroup Male 3plus: PricingStyle=1; Value=2.4; PurchaseOrSale=0; RandomiseBeforeSorting=false
                FilterByProperty Male: PropertyOfIndividual=Sex; Operator=13; Value=Male
                FilterByProperty 36months: PropertyOfIndividual=Age; Operator=16; Value=36
            RuminantConceptionCurve: ConceptionRateCoefficent=-14.247; ConceptionRateIntercept=5.182; ConceptionRateAsymptote=90
        GrazeFoodStore
          GrazeFoodStoreType NativePasture: NToDMDCoefficient=11.03; NToDMDIntercept=41.4; GreenNitrogen=2; DecayNitrogen=0.35; MinimumNitrogen=0.4; DecayDMD=0.1; MinimumDMD=43; DetachRate=0.03; CarryoverDetachRate=0.12; IntakeTropicalQualityCoefficient=0.16; IntakeQualityCoefficient=1.7; InitialBiomass=2000; FirstMonthOfGrowSeason=11; LastMonthOfGrowSeason=3; NumberMonthsForInitialBiomass=5
        AnimalFoodStore
          AnimalFoodStoreType Hay: Units=kg; DMD=49; Nitrogen=3.4; StartingAmount=100
            Transmutation Purchase: ResourceInShortfall=AnimalFoodStore.Hay; TransmutationPacketSize=1000; UseWholePackets=false; TransactionCategory=Transmutation
              Transmute: TransmuteResourceTypeName=Finances.General account; AmountPerPacket=100; TransmuteStyle=0; FinanceTypeForTransactionsName=No transactions
      ActivitiesHolder Activities
        CropActivityManageCrop Native Pasture on farm: LandItemNameToUse=Land.Paddock1; AreaRequested=100; UseAreaAvailable=true; TransactionCategory=Crop; OnPartialResourcesAvailableAction=0
          CropActivityManageProduct Native Pasture to GrazeFoodStore: ModelNameFileCrop=FileForage; CropName=Native; StoreItemName=GrazeFoodStore.NativePasture; ProportionKept=1; PlantedMultiplier=1; TreesPerHa=0; TransactionCategory=Crop.[Product]; OnPartialResourcesAvailableAction=0
        ActivityFolder Manage herd: OnPartialResourcesAvailableAction=0
          RuminantActivityGrow Grow all ruminants: EnergyGross=18.4; MethaneStoreName=Use store named Methane if present; OnPartialResourcesAvailableAction=0; TransactionCategory=Livestock.Manage
          RuminantActivityMove Move to pasture: ManagedPastureName=GrazeFoodStore.NativePasture; PerformAtStartOfSimulation=true; MoveSucklings=false; TransactionCategory=Livestock.Manage; OnPartialResourcesAvailableAction=0
            RuminantGroup All: RandomiseBeforeSorting=false
          RuminantActivityGrazeAll Graze all: HoursGrazed=8; TransactionCategory=Livestock.Grazing; OnPartialResourcesAvailableAction=2
          RuminantActivityManage Manage numbers: ManageFemaleBreederNumbers=true; PerformFemaleDestocking=true; PerformFemaleStocking=true; PerformMaleDestocking=true; PerformMaleStocking=true; MaximumBreedersKept=40; MinimumBreedersKept=200; MaxBreedersMultiplierToStop=10; MarkOldBreedersForSale=true; MaximumBreederAge=120; MaximumProportionBreedersPerPurchase=1; ReturnPregnantMaxAgeToHerd=false; RetainFemaleReplacementBreedersFromSaleHerd=true; ManageMaleBreederNumbers=true; MaximumSiresKept=0.1; MarkOldSiresForSale=true; MaximumSireAge=96; AllowSireReplacement=false; RestockSiresRelativeToBreeders=false; MaximumSiresPerPurchase=1; RetainMaleReplacementBreedersFromSaleHerd=true; GrowOutYoungMales=true; ContinuousGrowOutSales=false; MarkAgeWeightMalesForSale=true; CastrateMales=true; MaleSellingAge=18; MaleSellingWeight=350; GrowOutYoungFemales=false; FemaleSellingAge=24; FemaleSellingWeight=300; MarkAgeWeightFemalesForSale=true; GrazeFoodStoreNameSires=GrazeFoodStore.NativePasture; GrazeFoodStoreNameBreeders=GrazeFoodStore.NativePasture; GrazeFoodStoreNameGrowOutFemales=GrazeFoodStore.NativePasture; GrazeFoodStoreNameGrowOutMales=GrazeFoodStore.NativePasture; MinimumPastureBeforeRestock=1500; AdjustBreedingFemalesAtStartup=true; AdjustBreedingMalesAtStartup=true; TransactionCategory=Livestock.Manage; OnPartialResourcesAvailableAction=0
            ActivityTimerInterval every August: Interval=12; MonthDue=8
            SpecifyRuminant Breeders: RuminantTypeName=Ruminants.Bos indicus; Proportion=1
              RuminantTypeCohort 24mth breeder: Sex=0; Age=24; Number=0; Weight=0; WeightSD=0; Suckling=false; Sire=false
            SpecifyRuminant Sires: RuminantTypeName=Ruminants.Bos indicus; Proportion=1
              RuminantTypeCohort 36mth sire: Sex=1; Age=36; Number=0; Weight=0; WeightSD=0; Suckling=false; Sire=true
          RuminantActivityBuySell Buy and sell: BankAccountName=Finances.General account; TransactionCategory=Livestock.Manage; OnPartialResourcesAvailableAction=0
        SummariseRuminantHerd SummariseHerd: GroupStyle=0; IncludeTotalColumn=false
      CLEMFolder Reports
        ReportActivitiesPerformed: CreateHTML=false; RotateReport=false; AutoCreateHTML=false
        ReportResourceBalances: ResourceGroupsToReport=[GrazeFoodStore, AnimalFoodStore, Ruminants]; ReportAmount=true; ReportValue=false; ReportAnimalEquivalents=false; ReportAnimalWeight=false; ReportLandEntire=false; ReportLabourIndividuals=false
          VariableNames:
            Land
            GrazeFoodStore
            AnimalFoodStore
            Ruminants
        ReportResourceShortfalls: EventNames=[Activities].ResourceShortfallOccurred
          VariableNames:
            [Clock].Today as Date
            [Activities].LastShortfallResourceRequest.ResourceTypeName as Resource
            [Activities].LastShortfallResourceRequest.ActivityModel.Name as Activity
            [Activities].LastShortfallResourceRequest.Reason as Reason
            [Activities].LastShortfallResourceRequest.Required as Required
            [Activities].LastShortfallResourceRequest.Available as Available
        ReportResourceLedger HerdLedger: ResourceGroupsToReport=Ruminants; ReportStyle=0; ReportLossesAsNegative=false; IncludePrice=false; IncludeFinancialYear=false; IncludeConversions=false; TransactionCategoryLevels=0; VariableNames=Ruminants
        Report HerdSummary: EventNames=[Activities].SummariseHerd.OnReportItemGenerated
          VariableNames:
            [Clock].Today
            [Activities].SummariseHerd.ReportDetails.Breed as Breed
            [Activities].SummariseHerd.ReportDetails.Herd as Herd
            [Activities].SummariseHerd.ReportDetails.Age as AgeGroup
            [Activities].SummariseHerd.ReportDetails.Sex as Sex
            [Activities].SummariseHerd.ReportDetails.Number as Num
            [Activities].SummariseHerd.ReportDetails.AverageWeight as AvgWt
            [Activities].SummariseHerd.ReportDetails.AverageWeightGain as AvgWtGn
            [Activities].SummariseHerd.ReportDetails.AverageIntake as AvgIntake
            [Activities].SummariseHerd.ReportDetails.AdultEquivalents as AE
            [Activities].SummariseHerd.ReportDetails.NumberPregnant as NoPregnant
            [Activities].SummariseHerd.ReportDetails.NumberOfBirths as Births
  Simulation Reduce herd at start
    Memo Description
      Herd management example
      # Reduce male and female breeders at start of simulation

      ## Activity
      Activities.Manage herd.Manage numbers (Ruminant activity manage)

      ## Properties
      in Properties tab - Statup category
      - adjust female breeding numbers at start up = True
      - adjust male breeding numbers at start up = True

      in Properties tab - Herd size category
      - maximum number of breeders = 10
      - maximum sires kept = 0.1 (10% of max breeders)

      ## Initial herd
      - 20 female breeders and 2 male breeders
      - 5 Females age 24 months
      - 10 Females age 36 months
      - 5 Females age 48 months
      - 2 Males age 42 and sires

      ## Results
      - See category FillInitialHerd entries in HerdLedger report
      - See herd size in first month in HerdSummary report
    Clock: Start=1970-01-01; End=1970-01-31
    Summary summaryfile
    RandomNumberGenerator RandomNumbers: Seed=0; Iteration=0
    ZoneCLEM CLEM: FarmMultiplier=1; ClimateRegion=0; EcologicalIndicatorsCalculationInterval=12; EcologicalIndicatorsCalculationMonth=12; BuildTransactionCategoryFromTree=false; UseModelNameAsTransactionCategory=false; Area=0; Slope=0; AspectAngle=0; Altitude=50
      FileCrop FileForage: FileName=%root%\Examples\CLEM\FileForage.prn; CropNameColumnName=CropName; SoilTypeColumnName=SoilNum; YearColumnName=Year; MonthColumnName=Month; AmountColumnName=AmtKg
      ResourcesHolder Resources: same as Increase herd at start.CLEM.Resources
      ActivitiesHolder Activities
        CropActivityManageCrop Native Pasture on farm: same as Increase herd at start.CLEM.Activities.Native Pasture on farm
        ActivityFolder Manage herd: OnPartialResourcesAvailableAction=0
          RuminantActivityGrow Grow all ruminants: EnergyGross=18.4; MethaneStoreName=Use store named Methane if present; OnPartialResourcesAvailableAction=0; TransactionCategory=Livestock.Manage
          RuminantActivityMove Move to pasture: same as Increase herd at start.CLEM.Activities.Manage herd.Move to pasture
          RuminantActivityGrazeAll Graze all: HoursGrazed=8; TransactionCategory=Livestock.Grazing; OnPartialResourcesAvailableAction=2
          RuminantActivityManage Manage numbers: ManageFemaleBreederNumbers=true; PerformFemaleDestocking=true; PerformFemaleStocking=true; PerformMaleDestocking=true; PerformMaleStocking=true; MaximumBreedersKept=10; MinimumBreedersKept=200; MaxBreedersMultiplierToStop=10; MarkOldBreedersForSale=true; MaximumBreederAge=120; MaximumProportionBreedersPerPurchase=1; ReturnPregnantMaxAgeToHerd=false; RetainFemaleReplacementBreedersFromSaleHerd=true; ManageMaleBreederNumbers=true; MaximumSiresKept=0.1; MarkOldSiresForSale=true; MaximumSireAge=96; AllowSireReplacement=false; RestockSiresRelativeToBreeders=false; MaximumSiresPerPurchase=1; RetainMaleReplacementBreedersFromSaleHerd=true; GrowOutYoungMales=true; ContinuousGrowOutSales=false; MarkAgeWeightMalesForSale=true; CastrateMales=true; MaleSellingAge=18; MaleSellingWeight=350; GrowOutYoungFemales=false; FemaleSellingAge=24; FemaleSellingWeight=300; MarkAgeWeightFemalesForSale=true; GrazeFoodStoreNameSires=GrazeFoodStore.NativePasture; GrazeFoodStoreNameBreeders=GrazeFoodStore.NativePasture; GrazeFoodStoreNameGrowOutFemales=GrazeFoodStore.NativePasture; GrazeFoodStoreNameGrowOutMales=GrazeFoodStore.NativePasture; MinimumPastureBeforeRestock=1500; AdjustBreedingFemalesAtStartup=true; AdjustBreedingMalesAtStartup=true; TransactionCategory=Livestock.Manage; OnPartialResourcesAvailableAction=0
            ActivityTimerInterval every August: Interval=12; MonthDue=8
            SpecifyRuminant Breeders: RuminantTypeName=Ruminants.Bos indicus; Proportion=1
              RuminantTypeCohort 24mth breeder: Sex=0; Age=24; Number=0; Weight=0; WeightSD=0; Suckling=false; Sire=false
            SpecifyRuminant Sires: RuminantTypeName=Ruminants.Bos indicus; Proportion=1
              RuminantTypeCohort 36mth sire: Sex=1; Age=36; Number=0; Weight=0; WeightSD=0; Suckling=false; Sire=true
          RuminantActivityBuySell Buy and sell: BankAccountName=Finances.General account; TransactionCategory=Livestock.Manage; OnPartialResourcesAvailableAction=0
        SummariseRuminantHerd SummariseHerd: GroupStyle=0; IncludeTotalColumn=false
      CLEMFolder Reports: same as Increase herd at start.CLEM.Reports
  Simulation Grow out males
    Memo Description
      Herd management example
      # Manage males as grow out with age/weight sales

      ## Activity
      Activities.Manage herd.Manage numbers (Ruminant activity manage)

      ## Properties

      in Properties tab - Herd size category
      - Perform growing out of young males = true
      - Sell grow out males = true
      - Grow out males selling age = 18
      - Grow out male selling weight = 350
      - Castrate males = true

      Other settings
      - maximum breeder herd to 60 allowing increase from initial herd of 20
      - minimum breeder herd to 20 so no purchases will be made until herd falls below 20

      ## Initial herd
      - 20 female breeders and 2 male breeders
      - 5 Females age 24 months
      - 10 Females age 36 months
      - 5 Females age 48 months
      - 2 Males age 42 and sires

      ## Results
      - See herd AgeWeightSales category in HerdLedger report where individuals are of class = Castrated
      - See herd size in year one in HerdSummary report to see juvenile males castrated
      - The first castrated males from weaning and herd management appear in January 1972
      - The first age/weight sales of grow out males occur during herd management in August 1972
    Clock: Start=1970-01-01; End=1980-01-31
    Summary summaryfile
    RandomNumberGenerator RandomNumbers: Seed=0; Iteration=0
    ZoneCLEM CLEM: FarmMultiplier=1; ClimateRegion=0; EcologicalIndicatorsCalculationInterval=12; EcologicalIndicatorsCalculationMonth=12; BuildTransactionCategoryFromTree=false; UseModelNameAsTransactionCategory=false; Area=0; Slope=0; AspectAngle=0; Altitude=50
      FileCrop FileForage: FileName=%root%\Examples\CLEM\FileForage.prn; CropNameColumnName=CropName; SoilTypeColumnName=SoilNum; YearColumnName=Year; MonthColumnName=Month; AmountColumnName=AmtKg
      ResourcesHolder Resources: same as Increase herd at start.CLEM.Resources
      ActivitiesHolder Activities
        CropActivityManageCrop Native Pasture on farm: LandItemNameToUse=Land.Paddock1; AreaRequested=1000; UseAreaAvailable=true; TransactionCategory=Crop; OnPartialResourcesAvailableAction=0
          CropActivityManageProduct Native Pasture to GrazeFoodStore: same as Increase herd at start.CLEM.Activities.Native Pasture on farm.Native Pasture to GrazeFoodStore
        ActivityFolder Manage herd: OnPartialResourcesAvailableAction=0
          RuminantActivityGrow Grow all ruminants: EnergyGross=18.4; MethaneStoreName=Use store named Methane if present; OnPartialResourcesAvailableAction=0; TransactionCategory=Livestock.Manage
          RuminantActivityMove Move to pasture: same as Increase herd at start.CLEM.Activities.Manage herd.Move to pasture
          RuminantActivityGrazeAll Graze all: HoursGrazed=8; TransactionCategory=Livestock.Grazing; OnPartialResourcesAvailableAction=2
          RuminantActivityManage Manage numbers: ManageFemaleBreederNumbers=true; PerformFemaleDestocking=true; PerformFemaleStocking=true; PerformMaleDestocking=true; PerformMaleStocking=true; MaximumBreedersKept=60; MinimumBreedersKept=20; MaxBreedersMultiplierToStop=10; MarkOldBreedersForSale=true; MaximumBreederAge=120; MaximumProportionBreedersPerPurchase=1; ReturnPregnantMaxAgeToHerd=false; RetainFemaleReplacementBreedersFromSaleHerd=true; ManageMaleBreederNumbers=true; MaximumSiresKept=0.1; MarkOldSiresForSale=true; MaximumSireAge=96; AllowSireReplacement=false; RestockSiresRelativeToBreeders=false; MaximumSiresPerPurchase=1; RetainMaleReplacementBreedersFromSaleHerd=true; GrowOutYoungMales=true; ContinuousGrowOutSales=false; MarkAgeWeightMalesForSale=true; CastrateMales=true; MaleSellingAge=18; MaleSellingWeight=350; GrowOutYoungFemales=false; FemaleSellingAge=24; FemaleSellingWeight=300; MarkAgeWeightFemalesForSale=false; GrazeFoodStoreNameSires=GrazeFoodStore.NativePasture; GrazeFoodStoreNameBreeders=GrazeFoodStore.NativePasture; GrazeFoodStoreNameGrowOutFemales=GrazeFoodStore.NativePasture; GrazeFoodStoreNameGrowOutMales=GrazeFoodStore.NativePasture; MinimumPastureBeforeRestock=1500; AdjustBreedingFemalesAtStartup=false; AdjustBreedingMalesAtStartup=false; TransactionCategory=Livestock.Manage; OnPartialResourcesAvailableAction=0
            ActivityTimerInterval every August: Interval=12; MonthDue=8
            SpecifyRuminant Breeders: RuminantTypeName=Ruminants.Bos indicus; Proportion=1
              RuminantTypeCohort 24mth breeder: Sex=0; Age=24; Number=0; Weight=0; WeightSD=0; Suckling=false; Sire=false
            SpecifyRuminant Sires: RuminantTypeName=Ruminants.Bos indicus; Proportion=1
              RuminantTypeCohort 36mth sire: Sex=1; Age=36; Number=0; Weight=0; WeightSD=0; Suckling=false; Sire=true
          RuminantActivityBuySell Buy and sell: BankAccountName=Finances.General account; TransactionCategory=Livestock.Manage; OnPartialResourcesAvailableAction=0
          RuminantActivityBreed Breed: NumberConceived=0; InferStartupPregnancy=false; TransactionCategory=Livestock.Manage; OnPartialResourcesAvailableAction=0
            RuminantActivityControlledMating ControlledMating: MaximumAgeMating=120; JoiningsPerMale=1; TransactionCategory=Livestock.Manage; OnPartialResourcesAvailableAction=0
              ActivityTimerInterval Controlled mating: Interval=12; MonthDue=3
        SummariseRuminantHerd SummariseHerd: GroupStyle=1; IncludeTotalColumn=false
      CLEMFolder Reports
        ReportActivitiesPerformed: CreateHTML=false; RotateReport=false; AutoCreateHTML=false
        ReportResourceBalances: same as Increase herd at start.CLEM.Reports.ReportResourceBalances
        ReportResourceShortfalls: same as Increase herd at start.CLEM.Reports.ReportResourceShortfalls
        ReportResourceLedger HerdLedger: same as Increase herd at start.CLEM.Reports.HerdLedger
        Report HerdSummary: EventNames=[Activities].SummariseHerd.OnReportItemGenerated
          VariableNames:
            [Clock].Today
            [Activities].SummariseHerd.ReportDetails.Group as Class
            [Activities].SummariseHerd.ReportDetails.Breed as Breed
            [Activities].SummariseHerd.ReportDetails.Sex as Sex
            [Activities].SummariseHerd.ReportDetails.Number as Number
  Simulation Increase breeders
    Memo Description
      Herd management example
      # Increase female breeder numbers from breeding and purchases

      ## Activity
      Activities.Manage herd.Manage numbers (Ruminant activity manage)

      ## Properties

      - Perform growing out of young males as per last example
      - minimum breeder herd to 40 so purchases will be made from initial 20 till 40 individuals
      - maximum breeder herd to 60 where only herd replacement from breeding will increase herd from 40 to 60 breeders
      - maximum purchase as proportion of minimum breeders = 0.25 (40*0.25 = 10 individuals)
      - old breeders wil be sold at 120 months

      ## Initial herd
      - 20 female breeders and 2 male breeders

      ## Results
      - See BreederPurchase, BreederSales as category in HerdLedger report
      - The Herdsummary shows number in each class each month (plotted for breeders in Breeders graph)

      ### Number of breeders graph
      - The purchase of breeders happens in the first two years in the manage herd activity.
      - New breeders enter the herd from births via prebreeders
      - Purchases are limited to 10 individuals per year
      - Recruitment from the herd allows the number of breeders to increase to the maximum 60
      - The breeder herd is maintained through recriutment vs deaths and the sale of old breeders and excess breeders from 1975 onwards
      - As the population of breeders does not all below 40 there are not further purchases
    Clock: Start=1970-01-01; End=1980-01-31
    Summary summaryfile
    RandomNumberGenerator RandomNumbers: Seed=0; Iteration=0
    ZoneCLEM CLEM: FarmMultiplier=1; ClimateRegion=0; EcologicalIndicatorsCalculationInterval=12; EcologicalIndicatorsCalculationMonth=12; BuildTransactionCategoryFromTree=false; UseModelNameAsTransactionCategory=false; Area=0; Slope=0; AspectAngle=0; Altitude=50
      FileCrop FileForage: FileName=%root%\Examples\CLEM\FileForage.prn; CropNameColumnName=CropName; SoilTypeColumnName=SoilNum; YearColumnName=Year; MonthColumnName=Month; AmountColumnName=AmtKg
      ResourcesHolder Resources: same as Increase herd at start.CLEM.Resources
      ActivitiesHolder Activities
        CropActivityManageCrop Native Pasture on farm: same as Grow out males.CLEM.Activities.Native Pasture on farm
        ActivityFolder Manage herd (disabled): OnPartialResourcesAvailableAction=0
          RuminantActivityGrow Grow all ruminants: EnergyGross=18.4; MethaneStoreName=Use store named Methane if present; OnPartialResourcesAvailableAction=0; TransactionCategory=Livestock.Manage
          RuminantActivityMove Move to pasture: ManagedPastureName=GrazeFoodStore.NativePasture; PerformAtStartOfSimulation=true; MoveSucklings=false; TransactionCategory=Livestock.Manage; OnPartialResourcesAvailableAction=0
            RuminantGroup All: RandomiseBeforeSorting=false
          RuminantActivityGrazeAll Graze all: HoursGrazed=8; TransactionCategory=Livestock.Grazing; OnPartialResourcesAvailableAction=2
          RuminantActivityManage Manage numbers: ManageFemaleBreederNumbers=true; PerformFemaleDestocking=true; PerformFemaleStocking=true; PerformMaleDestocking=true; PerformMaleStocking=true; MaximumBreedersKept=60; MinimumBreedersKept=40; MaxBreedersMultiplierToStop=10; MarkOldBreedersForSale=true; MaximumBreederAge=120; MaximumProportionBreedersPerPurchase=0.25; ReturnPregnantMaxAgeToHerd=false; RetainFemaleReplacementBreedersFromSaleHerd=false; ManageMaleBreederNumbers=true; MaximumSiresKept=0.1; MarkOldSiresForSale=true; MaximumSireAge=96; AllowSireReplacement=false; RestockSiresRelativeToBreeders=false; MaximumSiresPerPurchase=1; RetainMaleReplacementBreedersFromSaleHerd=false; GrowOutYoungMales=true; ContinuousGrowOutSales=false; MarkAgeWeightMalesForSale=true; CastrateMales=true; MaleSellingAge=18; MaleSellingWeight=350; GrowOutYoungFemales=false; FemaleSellingAge=24; FemaleSellingWeight=300; MarkAgeWeightFemalesForSale=false; GrazeFoodStoreNameSires=GrazeFoodStore.NativePasture; GrazeFoodStoreNameBreeders=GrazeFoodStore.NativePasture; GrazeFoodStoreNameGrowOutFemales=GrazeFoodStore.NativePasture; GrazeFoodStoreNameGrowOutMales=GrazeFoodStore.NativePasture; MinimumPastureBeforeRestock=1500; AdjustBreedingFemalesAtStartup=false; AdjustBreedingMalesAtStartup=false; TransactionCategory=Livestock.Manage; OnPartialResourcesAvailableAction=0
            ActivityTimerInterval every August: Interval=12; MonthDue=8
            SpecifyRuminant Breeders: RuminantTypeName=Ruminants.Bos indicus; Proportion=1
              RuminantTypeCohort 24mth breeder: Sex=0; Age=24; Number=0; Weight=0; WeightSD=0; Suckling=false; Sire=false
            SpecifyRuminant Sires: RuminantTypeName=Ruminants.Bos indicus; Proportion=1
              RuminantTypeCohort 36mth sire: Sex=1; Age=36; Number=0; Weight=0; WeightSD=0; Suckling=false; Sire=true
          RuminantActivityBuySell Buy and sell: BankAccountName=Finances.General account; TransactionCategory=Livestock.Manage; OnPartialResourcesAvailableAction=0
          RuminantActivityBreed Breed: NumberConceived=0; InferStartupPregnancy=false; TransactionCategory=Livestock.Manage; OnPartialResourcesAvailableAction=0
            RuminantActivityControlledMating ControlledMating: MaximumAgeMating=120; JoiningsPerMale=1; TransactionCategory=Livestock.Manage; OnPartialResourcesAvailableAction=0
              ActivityTimerInterval Controlled mating: Interval=12; MonthDue=3
        SummariseRuminantHerd SummariseHerd (disabled): GroupStyle=1; IncludeTotalColumn=false
      CLEMFolder Reports
        ReportActivitiesPerformed: CreateHTML=false; RotateReport=false; AutoCreateHTML=false
        ReportResourceBalances (disabled): ResourceGroupsToReport=[GrazeFoodStore, AnimalFoodStore, Ruminants]; ReportAmount=true; ReportValue=false; ReportAnimalEquivalents=false; ReportAnimalWeight=false; ReportLandEntire=false; ReportLabourIndividuals=false
          VariableNames:
            Land
            GrazeFoodStore
            AnimalFoodStore
            Ruminants
        ReportResourceShortfalls (disabled): EventNames=[Activities].ResourceShortfallOccurred
          VariableNames:
            [Clock].Today as Date
            [Activities].LastShortfallResourceRequest.ResourceTypeName as Resource
            [Activities].LastShortfallResourceRequest.ActivityModel.Name as Activity
            [Activities].LastShortfallResourceRequest.Reason as Reason
            [Activities].LastShortfallResourceRequest.Required as Required
            [Activities].LastShortfallResourceRequest.Available as Available
        ReportResourceLedger HerdLedger (disabled): ResourceGroupsToReport=Ruminants; ReportStyle=0; ReportLossesAsNegative=false; IncludePrice=false; IncludeFinancialYear=false; IncludeConversions=false; TransactionCategoryLevels=0; VariableNames=Ruminants
        Report HerdSummary (disabled): EventNames=[Activities].SummariseHerd.OnReportItemGenerated
          VariableNames:
            [Clock].Today
            [Activities].SummariseHerd.ReportDetails.Group as Class
            [Activities].SummariseHerd.ReportDetails.Breed as Breed
            [Activities].SummariseHerd.ReportDetails.Sex as Sex
            [Activities].SummariseHerd.ReportDetails.Number as Number
  Simulation Grow out females
    Memo Description
      Herd management example
      # Grow out and sell for age/weight any excess young females

      ## Activity
      Activities.Manage herd.Manage numbers (Ruminant activity manage)

      ## Properties

      - Perform growing out of young males as per previous example
      - Breeder herd management as per last example
      - Perform growing out of young females = true
      - Sell grow out females = true
      - Grow out females selling age = 24
      - Grow out female selling weight = 300
      * Note difference in age and weight criteria between males and females.

      ## Initial herd
      - 20 female breeders and 2 male breeders

      ## Results
      - The HerdLedger report (filter for rows with [Class] = 'PreBreeder')
      - The PreBreeder entries appear from Aug 1972 when a prebreeder dies
      - In August 1976 the first group of female prebreeders in the growout herd are sold for age/weight sales.
      - The Herdsummary shows number in each class each month (plotted for prebreeders in PreBreeders graph)

      ### Number of breeders graph
      - The number of female PreBreeders fluctuates after 1972 based on individuals being sold when they reach age or weight, deaths and when returned to the herd to replace breeders as required.
    Clock: Start=1970-01-01; End=1980-01-31
    Summary summaryfile
    RandomNumberGenerator RandomNumbers: Seed=0; Iteration=0
    ZoneCLEM CLEM: FarmMultiplier=1; ClimateRegion=0; EcologicalIndicatorsCalculationInterval=12; EcologicalIndicatorsCalculationMonth=12; BuildTransactionCategoryFromTree=false; UseModelNameAsTransactionCategory=false; Area=0; Slope=0; AspectAngle=0; Altitude=50
      FileCrop FileForage: FileName=%root%\Examples\CLEM\FileForage.prn; CropNameColumnName=CropName; SoilTypeColumnName=SoilNum; YearColumnName=Year; MonthColumnName=Month; AmountColumnName=AmtKg
      ResourcesHolder Resources: same as Increase herd at start.CLEM.Resources
      ActivitiesHolder Activities
        CropActivityManageCrop Native Pasture on farm: same as Grow out males.CLEM.Activities.Native Pasture on farm
        ActivityFolder Manage herd: OnPartialResourcesAvailableAction=0
          RuminantActivityGrow Grow all ruminants: EnergyGross=18.4; MethaneStoreName=Use store named Methane if present; OnPartialResourcesAvailableAction=0; TransactionCategory=Livestock.Manage
          RuminantActivityMove Move to pasture: same as Increase herd at start.CLEM.Activities.Manage herd.Move to pasture
          RuminantActivityGrazeAll Graze all: HoursGrazed=8; TransactionCategory=Livestock.Grazing; OnPartialResourcesAvailableAction=2
          RuminantActivityManage Manage numbers: ManageFemaleBreederNumbers=true; PerformFemaleDestocking=true; PerformFemaleStocking=true; PerformMaleDestocking=true; PerformMaleStocking=true; MaximumBreedersKept=60; MinimumBreedersKept=40; MaxBreedersMultiplierToStop=10; MarkOldBreedersForSale=true; MaximumBreederAge=120; MaximumProportionBreedersPerPurchase=0.25; ReturnPregnantMaxAgeToHerd=false; RetainFemaleReplacementBreedersFromSaleHerd=false; ManageMaleBreederNumbers=true; MaximumSiresKept=0.1; MarkOldSiresForSale=true; MaximumSireAge=96; AllowSireReplacement=false; RestockSiresRelativeToBreeders=false; MaximumSiresPerPurchase=1; RetainMaleReplacementBreedersFromSaleHerd=false; GrowOutYoungMales=true; ContinuousGrowOutSales=false; MarkAgeWeightMalesForSale=true; CastrateMales=true; MaleSellingAge=18; MaleSellingWeight=350; GrowOutYoungFemales=true; FemaleSellingAge=24; FemaleSellingWeight=300; MarkAgeWeightFemalesForSale=true; GrazeFoodStoreNameSires=GrazeFoodStore.NativePasture; GrazeFoodStoreNameBreeders=GrazeFoodStore.NativePasture; GrazeFoodStoreNameGrowOutFemales=GrazeFoodStore.NativePasture; GrazeFoodStoreNameGrowOutMales=GrazeFoodStore.NativePasture; MinimumPastureBeforeRestock=1500; AdjustBreedingFemalesAtStartup=false; AdjustBreedingMalesAtStartup=false; TransactionCategory=Livestock.Manage; OnPartialResourcesAvailableAction=0
            ActivityTimerInterval every August: Interval=12; MonthDue=8
            SpecifyRuminant Breeders: RuminantTypeName=Ruminants.Bos indicus; Proportion=1
              RuminantTypeCohort 24mth breeder: Sex=0; Age=24; Number=0; Weight=0; WeightSD=0; Suckling=false; Sire=false
            SpecifyRuminant Sires: RuminantTypeName=Ruminants.Bos indicus; Proportion=1
              RuminantTypeCohort 36mth sire: Sex=1; Age=36; Number=0; Weight=0; WeightSD=0; Suckling=false; Sire=true
          RuminantActivityBuySell Buy and sell: BankAccountName=Finances.General account; TransactionCategory=Livestock.Manage; OnPartialResourcesAvailableAction=0
          RuminantActivityBreed Breed: same as Grow out males.CLEM.Activities.Manage herd.Breed
        SummariseRuminantHerd SummariseHerd: GroupStyle=1; IncludeTotalColumn=false
      CLEMFolder Reports
        ReportActivitiesPerformed: CreateHTML=false; RotateReport=false; AutoCreateHTML=false
        ReportResourceBalances: same as Increase herd at start.CLEM.Reports.ReportResourceBalances
        ReportResourceShortfalls: same as Increase herd at start.CLEM.Reports.ReportResourceShortfalls
        ReportResourceLedger HerdLedger: same as Increase herd at start.CLEM.Reports.HerdLedger
        Report HerdSummary: same as Grow out males.CLEM.Reports.HerdSummary
  Simulation Sell breeder rules
    Memo Description
      Herd management example
      # Rules for selling breeders

      ## Activity
      Activities.Manage herd.Manage numbers (Ruminant activity manage)

      ## Properties

      - As per Increase breeder example

      ## additional components
      - Added a Ruminant Group below the Manage ruminants activity with a RemoveFemaleBreeders style
      - Added filters below the ruminant group
      -- IsBreeder FilterByProperty -> Female.IsBreeder IsTrue
      -- AgeDescending SortByProperty -> Age descending
      -- TakeFive TakeFromFilter -> Individuals, 5, from start

      ## Initial herd
      - 20 female breeders and 2 male breeders

      ## Results
      -
    Clock: Start=1970-01-01; End=1980-01-31
    Summary summaryfile
    RandomNumberGenerator RandomNumbers: Seed=0; Iteration=0
    ZoneCLEM CLEM: FarmMultiplier=1; ClimateRegion=0; EcologicalIndicatorsCalculationInterval=12; EcologicalIndicatorsCalculationMonth=12; BuildTransactionCategoryFromTree=false; UseModelNameAsTransactionCategory=false; Area=0; Slope=0; AspectAngle=0; Altitude=50
      FileCrop FileForage: FileName=%root%\Examples\CLEM\FileForage.prn; CropNameColumnName=CropName; SoilTypeColumnName=SoilNum; YearColumnName=Year; MonthColumnName=Month; AmountColumnName=AmtKg
      ResourcesHolder Resources: same as Increase herd at start.CLEM.Resources
      ActivitiesHolder Activities
        CropActivityManageCrop Native Pasture on farm: same as Grow out males.CLEM.Activities.Native Pasture on farm
        ActivityFolder Manage herd: OnPartialResourcesAvailableAction=0
          RuminantActivityGrow Grow all ruminants: EnergyGross=18.4; MethaneStoreName=Use store named Methane if present; OnPartialResourcesAvailableAction=0; TransactionCategory=Livestock.Manage
          RuminantActivityMove Move to pasture: same as Increase herd at start.CLEM.Activities.Manage herd.Move to pasture
          RuminantActivityGrazeAll Graze all: HoursGrazed=8; TransactionCategory=Livestock.Grazing; OnPartialResourcesAvailableAction=2
          RuminantActivityManage Manage numbers: ManageFemaleBreederNumbers=true; PerformFemaleDestocking=true; PerformFemaleStocking=true; PerformMaleDestocking=true; PerformMaleStocking=true; MaximumBreedersKept=60; MinimumBreedersKept=40; MaxBreedersMultiplierToStop=10; MarkOldBreedersForSale=true; MaximumBreederAge=120; MaximumProportionBreedersPerPurchase=0.25; ReturnPregnantMaxAgeToHerd=false; RetainFemaleReplacementBreedersFromSaleHerd=false; ManageMaleBreederNumbers=true; MaximumSiresKept=0.1; MarkOldSiresForSale=true; MaximumSireAge=96; AllowSireReplacement=false; RestockSiresRelativeToBreeders=false; MaximumSiresPerPurchase=1; RetainMaleReplacementBreedersFromSaleHerd=false; GrowOutYoungMales=true; ContinuousGrowOutSales=false; MarkAgeWeightMalesForSale=true; CastrateMales=true; MaleSellingAge=18; MaleSellingWeight=350; GrowOutYoungFemales=false; FemaleSellingAge=24; FemaleSellingWeight=300; MarkAgeWeightFemalesForSale=false; GrazeFoodStoreNameSires=GrazeFoodStore.NativePasture; GrazeFoodStoreNameBreeders=GrazeFoodStore.NativePasture; GrazeFoodStoreNameGrowOutFemales=GrazeFoodStore.NativePasture; GrazeFoodStoreNameGrowOutMales=GrazeFoodStore.NativePasture; MinimumPastureBeforeRestock=1500; AdjustBreedingFemalesAtStartup=true; AdjustBreedingMalesAtStartup=true; TransactionCategory=Livestock.Manage; OnPartialResourcesAvailableAction=0
            ActivityTimerInterval every August: Interval=12; MonthDue=8
            SpecifyRuminant Breeders: RuminantTypeName=Ruminants.Bos indicus; Proportion=1
              RuminantTypeCohort 24mth breeder: Sex=0; Age=24; Number=0; Weight=0; WeightSD=0; Suckling=false; Sire=false
            SpecifyRuminant Sires: RuminantTypeName=Ruminants.Bos indicus; Proportion=1
              RuminantTypeCohort 36mth sire: Sex=1; Age=36; Number=0; Weight=0; WeightSD=0; Suckling=false; Sire=true
            RuminantGroup FiveOldestBreeders: RandomiseBeforeSorting=false; Identifier=RemoveBreedersFromHerd
              FilterByProperty IsBreeder: PropertyOfIndividual=Female.IsPreBreeder; Operator=83
              SortByProperty AgeDescending: PropertyOfIndividual=Age; SortDirection=1
              TakeFromFiltered TakeFive: TakeStyle=1; TakePositionStyle=0; Value=5
          RuminantActivityBuySell Buy and sell: BankAccountName=Finances.General account; TransactionCategory=Livestock.Manage; OnPartialResourcesAvailableAction=0
          RuminantActivityBreed Breed: same as Grow out males.CLEM.Activities.Manage herd.Breed
        SummariseRuminantHerd SummariseHerd: GroupStyle=1; IncludeTotalColumn=false
      CLEMFolder Reports
        ReportActivitiesPerformed: CreateHTML=false; RotateReport=false; AutoCreateHTML=false
        ReportResourceBalances: same as Increase herd at start.CLEM.Reports.ReportResourceBalances
        ReportResourceShortfalls: same as Increase herd at start.CLEM.Reports.ReportResourceShortfalls
        ReportResourceLedger HerdLedger: same as Increase herd at start.CLEM.Reports.HerdLedger
        Report HerdSummary: same as Grow out males.CLEM.Reports.HerdSummary
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