Simulations: Version=144
  DataStore
  Simulation FilterCheck
    Memo Simulation information
      # Filtering example

      By changing the filters in the Activities.ReportHerd this simulation will report all individuals that match in the Reports.Report
      Add and change the filters in the filter group to define which individuals are selected.
      You can also add sort and take components.

      ## Initial Herd by each individual created
      - 1 Suckling 2month Female GenoIndex and GenoA attributes
      - 2 Suckling 2month Male
      - 3 Suckling 2month Male
      - 4 Heifer Female 12month
      - 5 Female 24month GenoIndex
      - 6 Female 36month (cohort of 4)
      - 7 Female 36month
      - 8 Female 36month
      - 9 Female 36month
      - 10 Male 12month
      - 11 Male 24month
      - 12 Male 36month
      - 13 Male 36month Sire GenoA
    Memo Results
      # Checks completed

      ## No filters with sort and take tests
      * No filters (return all individuals) OK
      *  SortByProperty Age ascending OK
      * SortByProprty weight descending OK
      * TakeFromFiltered Proportion = 0.5 (50%) OK
      * TakeFromFiltered Individuals = 3 OK

      ## Filter by attributes

      * FilterByAttribute for genetics GenoIndex exists OK
      * FilterByAttribute for genetics GenoIndex value > 60 OK
      * FilterByAttribute for genetics GenoIndex value > 60 AND GenoA exists OK

      ## Filter by property

      * FilterByProperty boolean IsSire OK
      * FilterByProperty enum Sex is Male OK
      * FilterByProperty number Age < 12 OK

      ## Sort by attribute

      * SortByAttribute GenoIndex exists descending OK
      * SortByAttribute GenoIndex value descending with -9999 for those missing the attribute OK

      ## Failed filter check

      * FilterByProperty a male (IsSire) and female (IsLactating) based property OK - NO RESULTS

      ### Other hard coded checks performed
      * Filter a list of female ruminants by a female property (IsHeifer) OK - 3 ind weaned and not preg at startup returned
      * Filter a list of female ruminants by a male property (IsSire) OK - NO RESULTS
    Clock: Start=2000-08-01; End=2000-08-30
    Summary summaryfile
    RandomNumberGenerator RandomNumbers: Seed=0; Iteration=0
    ZoneCLEM CLEM: FarmMultiplier=1; ClimateRegion=0; EcologicalIndicatorsCalculationInterval=12; EcologicalIndicatorsCalculationMonth=12; Area=0; Slope=0; AspectAngle=0; Altitude=50
      ResourcesHolder Resources
        RuminantHerd Ruminants: TransactionStyle=0
          RuminantType Bos indicus: Breed=Bos indicus; EMaintEfficiencyCoefficient=0.35; EMaintEfficiencyIntercept=0.503; EGrowthEfficiencyCoefficient=0.79; EGrowthEfficiencyIntercept=0; ELactationEfficiencyCoefficient=0.35; ELactationEfficiencyIntercept=0.42; EMaintExponent=8.2e-05; EMaintIntercept=0.09; EMaintCoefficient=0.26; EnergyMaintenanceMaximumAge=6; Kme=1; GrowthEnergyIntercept1=6.7; GrowthEnergyIntercept2=20.3; GrowthEfficiency=1.09; NaturalWeaningAge=0; SRWFemale=500; SRWMaleMultiplier=1.2; SRWBirth=0.08; AgeGrowthRateCoefficient=0.0115; SRWGrowthScalar=0.32; IntakeCoefficient=0.024; IntakeIntercept=1.7; OverfeedPotentialIntakeModifier=1; ProteinCoefficient=120; ProteinDegradability=0.9; BaseAnimalEquivalent=450; GreenDietMax=0.98; GreenDietCoefficient=0.15; GreenDietZero=0.04; IntakeCoefficientBiomass=0.006; StrictFeedingLimits=true; MilkIntakeCoefficient=0.1206; MilkIntakeIntercept=3.8146; MilkIntakeMaximum=20; MilkLWTFodderSubstitutionProportion=0.2; MaxJuvenileIntake=0.035; ProportionalDiscountDueToMilk=0.3; ProportionOfMaxWeightToSurvive=0.5; LactatingPotentialModifierConstantA=0.42; LactatingPotentialModifierConstantB=61; LactatingPotentialModifierConstantC=1.7; MaximumSizeOfIndividual=1.2; MortalityBase=0.03; MortalityCoefficient=2.5; MortalityIntercept=0.05; MortalityExponent=3; JuvenileMortalityCoefficient=3; JuvenileMortalityMaximum=0.2; JuvenileMortalityExponent=1.8; WoolCoefficient=0; CashmereCoefficient=0; MilkCurveSuckling=0.6; MilkCurveNonSuckling=0.11; MilkingDays=300; MilkPeakYield=20; MilkOffsetDay=4; MilkPeakDay=45; ProportionOffspringMale=0.5; InterParturitionIntervalIntercept=10.847; InterParturitionIntervalCoefficient=-0.7994; GestationLength=9; MinimumAge1stMating=24; MinimumSize1stMating=0.5; MinimumDaysBirthToConception=61; CriticalCowWeight=0.5; MaximumMaleMatingsPerDay=30; PrenatalMortality=0.079; MethaneProductionCoefficient=20.7
            RuminantInitialCohorts Initial cohorts NoTrend: WeightWarningOccurred=true
              RuminantTypeCohort suckling F GenoIndex GenoA: Sex=0; Age=2; Number=1; Weight=0; WeightSD=0; Suckling=true; Sire=false
                SetAttributeWithValue GenoIndex: AttributeName=GenoIndex; Value=50; MinimumValue=-100; MaximumValue=200; StandardDeviation=20; InheritanceStyle=35; Mandatory=false
                SetAttributeWithValue GenoA: AttributeName=GenoA; Value=50; MinimumValue=-100; MaximumValue=200; StandardDeviation=20; InheritanceStyle=35; Mandatory=false
              RuminantTypeCohort suckling M 2: Sex=1; Age=2; Number=2; Weight=0; WeightSD=0; Suckling=true; Sire=false
              RuminantTypeCohort Heifer 14: Sex=0; Age=14; Number=1; Weight=0; WeightSD=0; Suckling=false; Sire=false
              RuminantTypeCohort Female 24: Sex=0; Age=24; Number=1; Weight=0; WeightSD=0; Suckling=false; Sire=false
              RuminantTypeCohort Female 36 4: Sex=0; Age=36; Number=4; Weight=0; WeightSD=0; Suckling=false; Sire=false
                SetAttributeWithValue GenoIndex: AttributeName=GenoIndex; Value=50; MinimumValue=-100; MaximumValue=200; StandardDeviation=20; InheritanceStyle=35; Mandatory=false
              RuminantTypeCohort Male 12: Sex=1; Age=12; Number=1; Weight=0; WeightSD=0; Suckling=false; Sire=false
              RuminantTypeCohort Male 24: Sex=1; Age=24; Number=1; Weight=0; WeightSD=0; Suckling=false; Sire=false
              RuminantTypeCohort Male 36: Sex=1; Age=36; Number=1; Weight=0; WeightSD=0; Suckling=false; Sire=false
                SetAttributeWithValue GenoA: AttributeName=GenoA; Value=50; MinimumValue=-100; MaximumValue=200; StandardDeviation=20; InheritanceStyle=35; Mandatory=true
              RuminantTypeCohort Sire GenoA: Sex=1; Age=36; Number=1; Weight=0; WeightSD=0; Suckling=false; Sire=true
                SetAttributeWithValue GenoA: AttributeName=GenoA; Value=50; MinimumValue=-100; MaximumValue=200; StandardDeviation=20; InheritanceStyle=35; Mandatory=false
      ActivitiesHolder Activities
        ReportRuminantHerd ReportHerd: ReportAtStart=true
          RuminantGroup: Reason=0
            FilterByProperty FilterByPropertyIsPregnant (disabled): PropertyOfIndividual=Female.IsPregnant; Operator=13; Value=True
            FilterByAttribute FilterByGenoIndexGT50 (disabled): AttributeTag=GenoIndex; FilterStyle=0; Operator=15; Value=50
            FilterByAttribute FilterByGenoIndexExists (disabled): AttributeTag=GenoIndex; FilterStyle=1; Operator=13; Value=true
            FilterByAttribute FilterByGenoA (disabled): AttributeTag=GenoA; FilterStyle=1; Operator=83
            FilterByProperty FilterByHeifer (disabled): PropertyOfIndividual=Female.IsHeifer; Operator=13; Value=True
            SortByProperty (disabled): PropertyOfIndividual=Weight; SortDirection=1
            TakeFromFiltered TakeFromFilteredProportion (disabled): TakeStyle=0; Value=0.5
            TakeFromFiltered TakeFromFilteredIndividuals1 (disabled): TakeStyle=1; Value=3
            FilterByProperty FilterBySires: PropertyOfIndividual=Male.IsSire; Operator=13; Value=true
            FilterByProperty FilterByMales (disabled): PropertyOfIndividual=Sex; Operator=13; Value=Male
            FilterByProperty FilterByAgeLess12 (disabled): PropertyOfIndividual=Age; Operator=20; Value=12
            FilterByProperty FilterByLactating (disabled): PropertyOfIndividual=Female.IsLactating; Operator=13; Value=true
            SortByAttribute SortByAttributeGenoIndexExists (disabled): AttributeTag=GenoIndex; FilterStyle=1; SortDirection=1; MissingAttributeValue=false
            SortByAttribute SortByAttributeGenoIndexValue (disabled): AttributeTag=GenoIndex; FilterStyle=0; SortDirection=0; MissingAttributeValue=-9999
      CLEMFolder Reports
        ReportResourceLedger HerdLedger: ReportStyle=0; ResourceGroupsToReport=Ruminants; ReportLossesAsNegative=false; IncludePrice=false; IncludeConversions=false; VariableNames=Ruminants
        Report: EventNames=[ReportHerd].OnReportItemGenerated
          VariableNames:
            [Clock].Today as Date
            [ReportHerd].ReportDetails.Individual.ID as ID
            [ReportHerd].ReportDetails.Individual.Sex as Sex
            [ReportHerd].ReportDetails.Individual.Age as Age
            [ReportHerd].ReportDetails.Individual.Weight as Weight
            [ReportHerd].ReportDetails.Individual.Attributes.Exists("GenoIndex") as GenoIndexExists
