Simulations: Version=151
  DataStore
  Simulation Canola Example
    Clock: Start=1992-01-01; End=1995-12-31
    Summary SummaryFile
    Weather: FileName=%root%\Examples\WeatherFiles\WaggaWagga.met
    SoilArbitrator Soil Arbitrator
    MicroClimate: a_interception=0; b_interception=0; c_interception=0; d_interception=0; SoilHeatFluxFraction=0.4; MinimumHeightDiffForNewLayer=0; NightInterceptionFraction=0.5; ReferenceHeight=2
    Zone: Area=1; Slope=0; AspectAngle=0; Altitude=50
      Report: EventNames=[Clock].DoReport
        VariableNames:
          [Clock].Today
          [Canola].AboveGround.Wt
          [Canola].Grain.Wt
      Soil: SoilType=sand; Site=CSU; NearestTown=Wagga Wagga; Region=Southern NSW; State=NSW; Latitude=0; Longitude=0; YearOfSampling=0; DataSource=Kirsten Verburg; Comments=Greenethorpe
        Chemical
          Thickness  NO3N  NH4N  PH
          100        20.1  1.65  5.8
          100        6.88  0.21  5.9
          100        2.8   0.14  6.6
          100        2.8   0.14  6.8
          100        1.32  0.1   7
          100        1.32  0.1   7.1
          100        0.9   0.1   7.2
          100        0.9   0.1   7.3
          100        0.58  0.12  7.4
          100        0.58  0.12  7.4
          100        0.46  0.13  7.6
          100        0.46  0.13  7.8
          100        0.47  0.14  8
          100        0.47  0.14  8.2
          100        0.56  0.14  8.3
          100        0.56  0.14  8.4
          100        0.79  0.09  8.4
          100        0.79  0.09  8.5
          100        0.95  0.14  8.5
          100        0.95  0.14  8.5
        InitialWater: PercentMethod=1; FractionFull=0.1; RelativeTo=CanolaSoil
        Physical
          Thickness  BD    AirDry  LL15  DUL   SAT
          100        1.48  0.03    0.11  0.28  0.34
          100        1.49  0.12    0.12  0.27  0.34
          100        1.41  0.14    0.14  0.25  0.32
          100        1.37  0.16    0.16  0.28  0.35
          100        1.41  0.18    0.18  0.28  0.35
          100        1.41  0.18    0.18  0.28  0.35
          100        1.52  0.21    0.21  0.3   0.34
          100        1.52  0.21    0.21  0.3   0.34
          100        1.62  0.24    0.24  0.31  0.33
          100        1.62  0.24    0.24  0.31  0.33
          100        1.66  0.26    0.26  0.31  0.34
          100        1.66  0.26    0.26  0.31  0.34
          100        1.62  0.27    0.27  0.32  0.34
          100        1.62  0.27    0.27  0.32  0.34
          100        1.62  0.28    0.28  0.33  0.36
          100        1.62  0.28    0.28  0.33  0.36
          100        1.62  0.28    0.28  0.33  0.36
          100        1.62  0.28    0.28  0.33  0.36
          100        1.62  0.28    0.28  0.33  0.36
          100        1.62  0.28    0.28  0.33  0.36
          SoilCrop CanolaSoil
            LL=[0.11, 0.12, 0.14, 0.16, 0.18, 0.18, 0.21, 0.21, 0.24, 0.24, 0.26, 0.26, 0.27, 0.27, 0.28, 0.28, 0.28, 0.28, 0.28, 0.28]
            KL=[0.06, 0.05, 0.05, 0.04, 0.04, 0.04, 0.04, 0.03, 0.03, 0.03, 0.03, 0.02, 0.02, 0.02, 0.01, 0.01, 0.01, 0.01, 0, 0]
            XF=[1, 1, 1, 1, 1, 1, 1, 1, 1, 1, 1, 1, 1, 1, 1, 1, 0.8, 0.4, 0, 0]
        WaterBalance SoilWater: SummerDate=1-nov; SummerU=6; SummerCona=3.5; WinterDate=1-apr; WinterU=2; WinterCona=2; DiffusConst=44; DiffusSlope=16; Salb=0.13; CN2Bare=72; CNRed=20; CNCov=0.8; DischargeWidth=5; CatchmentArea=10
          Thickness=[100, 100, 100, 100, 100, 100, 100, 100, 100, 100, 100, 100, 100, 100, 100, 100, 100, 100, 100, 100]
          SWCON=[0.8, 0.8, 0.8, 0.8, 0.8, 0.8, 0.8, 0.8, 0.8, 0.8, 0.8, 0.8, 0.8, 0.8, 0.8, 0.8, 0.6, 0.6, 0.6, 0.6]
        Organic: FOMCNRatio=60
          Thickness  Carbon  SoilCNRatio  FBiom  FInert  FOM
          100        0.83    8            0.06   0.01    439.771
          100        0.35    8            0.05   0.01    378.5144
          100        0.33    8            0.04   0.31    325.7904
          100        0.22    8            0.03   0.35    280.4104
          100        0.22    8            0.02   0.4     241.3514
          100        0.22    8            0.01   0.45    207.7331
          100        0.19    8            0.01   0.5     178.7975
          100        0.17    8            0.01   0.6     153.8925
          100        0.15    8            0.01   0.7     132.4565
          100        0.12    8            0.01   0.8     114.0063
          100        0.11    8            0.01   0.9     98.1262
          100        0.1     8            0.01   0.99    84.458
          100        0.1     8            0.01   0.99    72.6937
          100        0.1     8            0.01   0.99    62.568
          100        0.1     8            0.01   0.99    53.8528
          100        0.1     8            0.01   0.99    46.3515
          100        0.08    8            0.01   0.99    39.8951
          100        0.06    8            0.01   0.99    34.3381
          100        0.05    8            0.01   0.99    29.555
          100        0.04    8            0.01   0.99    25.4383
        CERESSoilTemperature Temperature
        Nutrient
        Sample Soil sample: SWUnits=Volumetric; OCUnits=Total; PHUnits=Water
          Thickness  NO3    NH4
          100        45.88  7.4
          200        20.3   5.8
          300        0      0
          300        0      0
          300        0      0
          300        0      0
          300        0      0
          200        0      0
      Fertiliser
      SurfaceOrganicMatter: InitialResidueName=maize_stubble; InitialResidueType=maize; InitialResidueMass=0; InitialStandingFraction=0; InitialCPR=400; InitialCNR=60
      Plant Canola
      Manager Sow using a variable rule
        Crop = [Canola]
        StartDate = 1-May
        EndDate = 30-Jun
        MinESW = 50
        MinRain = 25
        RainDays = 7
        CultivarName = GenericEarly
        SowingDepth = 25
        RowSpacing = 180
        Population = 45
```csharp
using Models.Interfaces;
using APSIM.Shared.Utilities;
using Models.Utilities;
using Models.Soils;
using Models.PMF;
using Models.Core;
using System;
using System.Linq;
using Models.Climate;

namespace Models
{
    [Serializable]
    public class Script : Model
    {
        [Link] private Clock Clock;
        [Link] private Fertiliser Fertiliser;
        [Link] private Summary Summary;
        [Link] private Soil Soil;
        private Accumulator accumulatedRain;
        [Link]
        private ISoilWater waterBalance;
        
        [Description("Crop")]
        public IPlant Crop { get; set; }

        [Description("Start of sowing window (d-mmm)")]
        public string StartDate { get; set; }

        [Description("End of sowing window (d-mmm)")]
        public string EndDate { get; set; }

        [Description("Minimum extractable soil water for sowing (mm)")]
        public double MinESW { get; set; }

        [Description("Accumulated rainfall required for sowing (mm)")]
        public double MinRain { get; set; }

        [Description("Duration of rainfall accumulation (d)")]
        public int RainDays { get; set; }

        [Display(Type = DisplayType.CultivarName)]
        [Description("Cultivar to be sown")]
        public string CultivarName { get; set; }

        [Description("Sowing depth (mm)")]
        public double SowingDepth { get; set; }

        [Description("Row spacing (mm)")]
        public double RowSpacing { get; set; }

        [Description("Plant population (/m2)")]
        public double Population { get; set; }
        
        
        [EventSubscribe("StartOfSimulation")]
        private void OnSimulationCommencing(object sender, EventArgs e)
        {
            accumulatedRain = new Accumulator(this, "[Weather].Rain", RainDays);
        }

        [EventSubscribe("DoManagement")]
        private void OnDoManagement(object sender, EventArgs e)
        {
            accumulatedRain.Update();
            
            if (DateUtilities.WithinDates(StartDate, Clock.Today, EndDate) &&
                !Crop.IsAlive &&
                MathUtilities.Sum(waterBalance.ESW) > MinESW &&
                accumulatedRain.Sum > MinRain)
            {
                Crop.Sow(population: Population, cultivar: CultivarName, depth: SowingDepth, rowSpacing: RowSpacing);    
            }
        }
    }
}
```
      Manager Fertilise at sowing
        Crop = [Canola]
        FertiliserType = NH4N
        Amount = 31
```csharp
using Models.PMF;
using Models.Core;
using System;
using System.Linq;
namespace Models
{
    [Serializable]
    public class Script : Model
    {
        [Link] Clock Clock;
        [Link] Fertiliser Fertiliser;
        
        [Description("Crop to be fertilised")]
        public IPlant Crop { get; set; }

        [Description("Type of fertiliser to apply? ")] 
        public Fertiliser.Types FertiliserType { get; set; }
    
        [Description("Amount of fertiliser to be applied (kg/ha)")]
        public double Amount { get; set; }
        
        [EventSubscribe("Sowing")]
        private void OnSowing(object sender, EventArgs e)
        {
            Model crop = sender as Model;
            if (Crop != null && crop.Name.ToLower() == (Crop as IModel).Name.ToLower())
                Fertiliser.Apply(Amount: Amount, Type: FertiliserType);
        }
    }
}
```
      Manager Harvesting
        Crop = [Canola]
```csharp
using APSIM.Shared.Utilities;
using Models.Utilities;
using Models.Soils;
using Models.PMF;
using Models.Core;
using System;
using System.Linq;

namespace Models
{
    [Serializable] 
    public class Script : Model
    {
        [Description("Crop")]
        public IPlant Crop { get; set; }
        
        [EventSubscribe("DoManagement")]
        private void OnDoManagement(object sender, EventArgs e)
        {
            if (Crop.IsReadyForHarvesting)
            {
                Crop.Harvest();
                Crop.EndCrop();
            }
        }
    }
}
```
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