Simulations: Version=151
  DataStore
  Simulation Canola Grazing Example
    Clock: Start=1992-01-01; End=1995-12-31
    Summary SummaryFile
    Weather: FileName=%root%/Examples/WeatherFiles/WaggaWagga.met
    SoilArbitrator Soil Arbitrator
    Stock: RandSeed=9999
    Forages
      Parameters:
        Name                          IsLive  DigestibilityString  FractionConsumable  MinimumAmount  UseDigestibilityFromModel
        SurfaceOrganicMatter.Residue  true    0                    0                   0              false
        SurfaceOrganicMatter.Residue  false   0                    0                   0              false
        Canola.Root                   true    .7                   0                   0              false
        Canola.Root                   false   .3                   0                   0              false
        Canola.Leaf                   true    .7                   1                   0              false
        Canola.Leaf                   false   .3                   1                   0              false
        Canola.Grain                  true    0.7                  0                   0              false
        Canola.Grain                  false   0.3                  0                   0              false
        Canola.Stem                   true    0.7                  1                   0              false
        Canola.Stem                   false   0.3                  1                   0              false
        Canola.Shell                  true    0.7                  0                   0              false
        Canola.Shell                  false   0.3                  0                   0              false
    Supplement: SpoilageTime=0
      Stores:
        {Name=fodder, Stored=0, IsRoughage=true, DMContent=0.85, DMD=0, MEContent=0, CPConc=0, ProtDg=0, PConc=0, SConc=0, EEConc=0, ADIP2CP=0, AshAlk=0, MaxPassage=0}
    Manager GrazeForageCrop
      Genotype = Large Merino
      Sex = Male
      Age = 12
      Weight = 100
      Pregnant = 0
      Lactating = 0
      YoungNumber = 0
      YoungWt = 0
      StockingRate = 50
      CurrentLocation = Away
      PreGrazingDM = 1000
      PostGrazingDM = 500
      MinGrazingDays = 0
      DoNoGrazingWindow = True
      NoGrazeStart = 1-jun
      NoGrazeEnd = 20-may
      SupplementName =
      SupplementFirst = False
      SupplementEveryDay = 0
      SupplementOnPastureMass = 0
      TriggerPastureMass = 2100
```csharp
using Models.PMF.Interfaces;
using System.Diagnostics;
using Models.AgPasture;
using System.Linq;
using System.Collections.Generic;
using System.Collections;
using Models.Soils;
using Models.PMF;
using System.Xml.Serialization;
using APSIM.Shared.Utilities;
using Models.GrazPlan;
using Models.Utilities;
using Models.Core;
using Models;
using Models.ForageDigestibility;
using System;

namespace Models
{

    [Serializable]
    public class Script : Model
    {
        [Link] Clock clock;
        [Link] Stock stock;
        [Link] Supplement supplement;
        [Link] List<Zone> paddocks;
        [Link] ISummary summary;
        [Link] Simulation farm;
        [Link] Forages forages;

        private int CurrentGroupNum = 1;    // animal group number
        private int CurrentLocationNum { get; set; }

        [Separator("Stock type info, the same type of stock are brought onto the paddock at each grazing")]

        [Description("Stock: genotype (e.g. Small Merino, Angus, Friesian):")] 
        [Display(Values="GetGenotypes")]
        public string Genotype { get; set; }

        [Description("Stock: sex (Female, Male, Castrate):")] 
        public ReproductiveType Sex { get; set; }

        [Description("Stock: age (months):")] 
        public double Age { get; set; }

        [Description("Stock: weight (kg liveweight /head):")] 
        public double Weight { get; set; }

        [Description("Stock: fertility status (0 if non-pregnant or days since conception):")] 
        public int Pregnant { get; set; }

        [Description("Stock: lactation status (0 if non-lactating or days since parturition):")]
        public int Lactating { get; set; }

        [Description("Stock: number of unweaned young:")]
        public int YoungNumber { get; set; }

        [Description("Stock: weight of unweaned young:")] 
        public double YoungWt { get; set; }

        [Separator("Grazing event information")]

        [Description("Paddock stocking rate (head/ha): ")] 
        public double StockingRate { get; set; }

        [Description("Initial location of the cows (give either the paddock name or 'Away'): ")] 
        public string CurrentLocation { get; set; }

        [Description("Standing biomass at which to bring the stock into the simulation (kg DM/ha): ")] 
        public double PreGrazingDM { get; set; }

        [Description("Standing biomass at which to exit  stock from the simulation (kg DM/ha): ")] 
        public double PostGrazingDM { get; set; }

        [Description("Don't move the stock onto the crop unless there is approx. X days of grazable forage available: ")] 
        public int MinGrazingDays { get; set; }

        [Description("Implement a no-grazing window? (tick for yes): ")] 
        public bool DoNoGrazingWindow { get; set; }

        [Description("Start of the no-grazing window (dd-MMM)")] 
        public string NoGrazeStart { get; set; }

        [Description("End of the no-grazing window (dd-MMM)")] 
        public string NoGrazeEnd { get; set; }

        [Separator("Supplementary feeding")]

        [Description("Name of the supplement to feed: ")] 
        public string SupplementName { get; set; }

        [Description("Feed the supplement first (i.e. before the new forage is available to the stock)?: ")] 
        public bool SupplementFirst { get; set; }

        [Description("Amount of supplementary feeding offered every day (kg DM /head /day): ")] 
        public double SupplementEveryDay { get; set; }

        [Description("Additional amount of supplement offered when available biomass is low (kg DM /head /day): ")] 
        public double SupplementOnPastureMass { get; set; }

        [Description("Trigger biomass for above rule (kg DM /ha): ")] 
        public double TriggerPastureMass { get; set; }

        public int NumStock { get; set; }
        public bool GrazingSeasonIsOpen { get; set; } // number of cows on the whole farm
        public double HarvestableBiomass { get; set; }

        // Return a list of genotypes to the properties tab.
        public string[] GetGenotypes()
        {
            if (stock != null)
                return stock.Genotypes.Names.ToArray();
            return null;
        }

        [EventSubscribe("StartOfSimulation")]
        private void OnStartOfSimulation(object sender, EventArgs e)
        {

            //Debugger.Break();

            summary.WriteMessage(this, "Initialising the paddock information", MessageType.Diagnostic);

            NumStock = (int)(Math.Round(StockingRate * farm.Area, 0));

            if ((CurrentLocation.ToLower() != "away") && (NumStock > 0))
            {
                BuyStock();
                stock.Move(CurrentLocation);
                summary.WriteMessage(this, " The Stock have been moved to " + CurrentLocation, MessageType.Diagnostic);
            }

            summary.WriteMessage(this, "     The number of animals has been rounded to " + NumStock + " from " + (StockingRate * farm.Area), MessageType.Diagnostic);
            summary.WriteMessage(this, "     The animals will begin in " + CurrentLocation + " which is paddock number " + CurrentLocationNum + " in the simulation", MessageType.Diagnostic);
            summary.WriteMessage(this, "     The area of the whole farm is " + farm.Area + " ha", MessageType.Diagnostic);

        }

        [EventSubscribe("DoManagement")]
        private void OnDoManagement(object sender, EventArgs e)
        {
            GrazingSeasonIsOpen = true;
            if (DoNoGrazingWindow)
                GrazingSeasonIsOpen = !DateUtilities.WithinDates(NoGrazeStart, clock.Today, NoGrazeEnd);

            bool sellSomeStock = false;
            if (!GrazingSeasonIsOpen)
                sellSomeStock = true;

            // Calculate forage mass in the paddock
            HarvestableBiomass = 0.0;
            foreach (var forage in forages.ModelsWithDigestibleBiomass)
                foreach (var forageMaterial in forage.Material)
                    HarvestableBiomass += forageMaterial.Consumable.Wt;
            HarvestableBiomass *= 10;  // Convert to kg/ha

            if (HarvestableBiomass <= PostGrazingDM)
                sellSomeStock = true;

            if (CurrentLocation == "Away")
                sellSomeStock = false;

            double minFodder = 0.03 * MinGrazingDays * NumStock * Weight; // The 0.03 is the propostion of body mass that the stock might eat
            if (CurrentLocation == "Away" && NumStock > 0 && (HarvestableBiomass >= PreGrazingDM) && HarvestableBiomass >= (PostGrazingDM + minFodder) && GrazingSeasonIsOpen)
            {
                CurrentLocation = paddocks[0].Name;
                CurrentLocationNum = paddocks[0].Index;
                BuyStock();
                stock.Move(CurrentLocation);
                summary.WriteMessage(this, "     Buying stock ", MessageType.Diagnostic);
            }

            if (sellSomeStock)
            {
                CurrentLocation = "Away";
                CurrentLocationNum = -1;
                SellStock();
                summary.WriteMessage(this, "     Selling stock ", MessageType.Diagnostic);
            }

            if (CurrentLocation != "Away")
            {
                if (SupplementEveryDay > 0)
                {
                    double silageOnHand = supplement.Stores[2 - 1].Stored;
                    if (silageOnHand < SupplementEveryDay * stock.NumberAll)
                    {
                        supplement.Buy(SupplementEveryDay * 30.0 * stock.NumberAll, SupplementName);  // i.e. 1 months worth
                        summary.WriteMessage(this, "SupplementEveryDay: Buying " + SupplementName + " of total amount : " + (SupplementEveryDay * 90 * stock.NumberAll) + " kg DM", MessageType.Diagnostic);
                    }
                    supplement.Feed(SupplementName, SupplementEveryDay * stock.NumberAll, CurrentLocation, SupplementFirst);
                }

                if (SupplementOnPastureMass > 0 && HarvestableBiomass <= TriggerPastureMass)
                {
                    double silageOnHand = supplement.Stores[2 - 1].Stored;
                    if (silageOnHand < SupplementOnPastureMass * stock.NumberAll)
                    {
                        supplement.Buy(SupplementOnPastureMass * 30.0 * stock.NumberAll, SupplementName);  // i.e. 1 months worth
                        summary.WriteMessage(this, "SupplementOnBiomass: Buying " + SupplementName + " of total amount : " + (SupplementOnPastureMass * 90 * stock.NumberAll) + " kg DM", MessageType.Diagnostic);
                    }
                    supplement.Feed(SupplementName, SupplementOnPastureMass * stock.NumberAll, CurrentLocation, SupplementFirst);
                }
            }
        }


        public void BuyStock()
        {
            CurrentGroupNum = stock.NoGroups + 1;
            StockBuy purchase = new StockBuy();
            purchase.Genotype = Genotype;
            purchase.Number = NumStock;
            purchase.Sex = Sex;
            purchase.Age = Age;       // age in months
            purchase.Weight = Weight;  // live weight in kg
            purchase.UseTag = CurrentGroupNum + 1;
            purchase.MatedTo = purchase.Genotype;
            purchase.Pregnant = Pregnant;  // days pregnant, 0 = non pregnant, 1 = pregnant
            purchase.Lactating = Lactating;  // 0 for dry, 1 for lactating
            purchase.NumYoung = YoungNumber;
            purchase.YoungWt = YoungWt;

            stock.Buy(purchase);
        }

        public void SellStock()
        {
            int NumGroups = stock.NoGroups;

            NumGroups = stock.NoGroups;
            for (int gg = 1; gg <= NumGroups; gg++)
            {
                stock.Sell(stock.Number[gg - 1]);
            }
        }
    }
}
```
    MicroClimate: a_interception=0; b_interception=0; c_interception=0; d_interception=0; SoilHeatFluxFraction=0.4; MinimumHeightDiffForNewLayer=0; NightInterceptionFraction=0.5; ReferenceHeight=2
    Zone: Area=1; Slope=0; AspectAngle=0; Altitude=50
      Report: EventNames=[Clock].DoReport
        VariableNames:
          [Clock].Today
          [Canola].AboveGround.Wt
          [Canola].Grain.Wt
          [Stock].Paddock
          [Stock].NumberAll
          [Stock].WeightAll
          [Stock].IntakeAll.Weight
      Soil: SoilType=sand; Site=CSU; NearestTown=Wagga Wagga; Region=Southern NSW; State=NSW; Latitude=0; Longitude=0; YearOfSampling=0; DataSource=Kirsten Verburg; Comments=Greenethorpe
        Chemical
          Thickness  NO3N  NH4N  PH
          100        20.1  1.65  5.8
          100        6.88  0.21  5.9
          100        2.8   0.14  6.6
          100        2.8   0.14  6.8
          100        1.32  0.1   7
          100        1.32  0.1   7.1
          100        0.9   0.1   7.2
          100        0.9   0.1   7.3
          100        0.58  0.12  7.4
          100        0.58  0.12  7.4
          100        0.46  0.13  7.6
          100        0.46  0.13  7.8
          100        0.47  0.14  8
          100        0.47  0.14  8.2
          100        0.56  0.14  8.3
          100        0.56  0.14  8.4
          100        0.79  0.09  8.4
          100        0.79  0.09  8.5
          100        0.95  0.14  8.5
          100        0.95  0.14  8.5
        InitialWater: PercentMethod=1; FractionFull=0.1; RelativeTo=CanolaSoil
        Physical
          Thickness  BD    AirDry  LL15  DUL   SAT
          100        1.48  0.03    0.11  0.28  0.34
          100        1.49  0.12    0.12  0.27  0.34
          100        1.41  0.14    0.14  0.25  0.32
          100        1.37  0.16    0.16  0.28  0.35
          100        1.41  0.18    0.18  0.28  0.35
          100        1.41  0.18    0.18  0.28  0.35
          100        1.52  0.21    0.21  0.3   0.34
          100        1.52  0.21    0.21  0.3   0.34
          100        1.62  0.24    0.24  0.31  0.33
          100        1.62  0.24    0.24  0.31  0.33
          100        1.66  0.26    0.26  0.31  0.34
          100        1.66  0.26    0.26  0.31  0.34
          100        1.62  0.27    0.27  0.32  0.34
          100        1.62  0.27    0.27  0.32  0.34
          100        1.62  0.28    0.28  0.33  0.36
          100        1.62  0.28    0.28  0.33  0.36
          100        1.62  0.28    0.28  0.33  0.36
          100        1.62  0.28    0.28  0.33  0.36
          100        1.62  0.28    0.28  0.33  0.36
          100        1.62  0.28    0.28  0.33  0.36
          SoilCrop CanolaSoil
            LL=[0.11, 0.12, 0.14, 0.16, 0.18, 0.18, 0.21, 0.21, 0.24, 0.24, 0.26, 0.26, 0.27, 0.27, 0.28, 0.28, 0.28, 0.28, 0.28, 0.28]
            KL=[0.06, 0.05, 0.05, 0.04, 0.04, 0.04, 0.04, 0.03, 0.03, 0.03, 0.03, 0.02, 0.02, 0.02, 0.01, 0.01, 0.01, 0.01, 0, 0]
            XF=[1, 1, 1, 1, 1, 1, 1, 1, 1, 1, 1, 1, 1, 1, 1, 1, 0.8, 0.4, 0, 0]
        WaterBalance SoilWater: SummerDate=1-nov; SummerU=6; SummerCona=3.5; WinterDate=1-apr; WinterU=2; WinterCona=2; DiffusConst=44; DiffusSlope=16; Salb=0.13; CN2Bare=72; CNRed=20; CNCov=0.8; DischargeWidth=5; CatchmentArea=10
          Thickness=[100, 100, 100, 100, 100, 100, 100, 100, 100, 100, 100, 100, 100, 100, 100, 100, 100, 100, 100, 100]
          SWCON=[0.8, 0.8, 0.8, 0.8, 0.8, 0.8, 0.8, 0.8, 0.8, 0.8, 0.8, 0.8, 0.8, 0.8, 0.8, 0.8, 0.6, 0.6, 0.6, 0.6]
        Organic: FOMCNRatio=60
          Thickness  Carbon  SoilCNRatio  FBiom  FInert  FOM
          100        0.83    8            0.06   0.01    439.771
          100        0.35    8            0.05   0.01    378.5144
          100        0.33    8            0.04   0.31    325.7904
          100        0.22    8            0.03   0.35    280.4104
          100        0.22    8            0.02   0.4     241.3514
          100        0.22    8            0.01   0.45    207.7331
          100        0.19    8            0.01   0.5     178.7975
          100        0.17    8            0.01   0.6     153.8925
          100        0.15    8            0.01   0.7     132.4565
          100        0.12    8            0.01   0.8     114.0063
          100        0.11    8            0.01   0.9     98.1262
          100        0.1     8            0.01   0.99    84.458
          100        0.1     8            0.01   0.99    72.6937
          100        0.1     8            0.01   0.99    62.568
          100        0.1     8            0.01   0.99    53.8528
          100        0.1     8            0.01   0.99    46.3515
          100        0.08    8            0.01   0.99    39.8951
          100        0.06    8            0.01   0.99    34.3381
          100        0.05    8            0.01   0.99    29.555
          100        0.04    8            0.01   0.99    25.4383
        CERESSoilTemperature Temperature
        Nutrient
        Sample Soil sample: SWUnits=Volumetric; OCUnits=Total; PHUnits=Water
          Thickness  NO3    NH4
          100        45.88  7.4
          200        20.3   5.8
          300        0      0
          300        0      0
          300        0      0
          300        0      0
          300        0      0
          200        0      0
      Fertiliser
      SurfaceOrganicMatter: InitialResidueName=maize_stubble; InitialResidueType=maize; InitialResidueMass=0; InitialStandingFraction=0; InitialCPR=400; InitialCNR=60
      Plant Canola
      Manager Sow on a fixed date
        Crop = [Canola]
        SowDate = 15-Mar
        CultivarName = GenericWinter
        SowingDepth = 25
        RowSpacing = 180
        Population = 45
```csharp
using APSIM.Shared.Utilities;
using Models.Utilities;
using Models.Soils;
using Models.PMF;
using Models.Core;
using System;
using System.Linq;

namespace Models
{
    [Serializable]
    public class Script : Model
    {
        [Link] Clock Clock;
        [Link] Fertiliser Fertiliser;
        [Link] Summary Summary;
        [Link] Soil Soil;
        
        [Description("Crop")]
        public IPlant Crop { get; set; }

        [Description("Sowing date (d-mmm)")]
        public string SowDate { get; set; }

        [Display(Type = DisplayType.CultivarName)]
        [Description("Cultivar to be sown")]
        public string CultivarName { get; set; }

        [Description("Sowing depth (mm)")]
        public double SowingDepth { get; set; }

        [Description("Row spacing (mm)")]
        public double RowSpacing { get; set; }

        [Description("Plant population (/m2)")]
        public double Population { get; set; }

        [EventSubscribe("DoManagement")]
        private void OnDoManagement(object sender, EventArgs e)
        {
            if (DateUtilities.WithinDates(SowDate, Clock.Today, SowDate))
            {
                Crop.Sow(population: Population, cultivar: CultivarName, depth: SowingDepth, rowSpacing: RowSpacing);    
            }
        }
    }
}
```
      Manager Fertilise at sowing
        Crop = [Canola]
        FertiliserType = NH4N
        Amount = 31
```csharp
using Models.PMF;
using Models.Core;
using System;
using System.Linq;
namespace Models
{
    [Serializable]
    public class Script : Model
    {
        [Link] Clock Clock;
        [Link] Fertiliser Fertiliser;
        
        [Description("Crop to be fertilised")]
        public IPlant Crop { get; set; }

        [Description("Type of fertiliser to apply? ")] 
        public Fertiliser.Types FertiliserType { get; set; }
    
        [Description("Amount of fertiliser to be applied (kg/ha)")]
        public double Amount { get; set; }
        
        [EventSubscribe("Sowing")]
        private void OnSowing(object sender, EventArgs e)
        {
            Model crop = sender as Model;
            if (Crop != null && crop.Name.ToLower() == (Crop as IModel).Name.ToLower())
                Fertiliser.Apply(Amount: Amount, Type: FertiliserType);
        }
    }
}
```
      Manager Harvesting
        Crop = [Canola]
```csharp
using APSIM.Shared.Utilities;
using Models.Utilities;
using Models.Soils;
using Models.PMF;
using Models.Core;
using System;
using System.Linq;

namespace Models
{
    [Serializable] 
    public class Script : Model
    {
        [Description("Crop")]
        public IPlant Crop { get; set; }
        
        [EventSubscribe("DoManagement")]
        private void OnDoManagement(object sender, EventArgs e)
        {
            if (Crop.IsReadyForHarvesting)
            {
                Crop.Harvest();
                Crop.EndCrop();
            }
        }
    }
}
```
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