Simulations: Version=136
  DataStore
  Experiment Continuous_TOS
    Factors
      Permutation
        Factor TOS
          CompositeFactor 1
            Specifications:
              [Sowing].Script.SowDate = 20-Apr
              [Irrigate on fixed dates].Script.IrrigateDates = 20-Apr
          CompositeFactor 2
            Specifications:
              [Sowing].Script.SowDate = 10-May
              [Irrigate on fixed dates].Script.IrrigateDates = 10-May
          CompositeFactor 3
            Specifications:
              [Sowing].Script.SowDate = 30-May
              [Irrigate on fixed dates].Script.IrrigateDates = 30-May
    Simulation Cont_TOS
      Weather: FileName=%root%/Examples/WeatherFiles/WaggaWagga.met
      Clock: Start=1992-01-01; End=1995-12-31
      Summary summaryfile
      SoilArbitrator Soil Arbitrator
      Zone Field: Area=1; Slope=0; AspectAngle=0; Altitude=50
        Manager Sowing
          SowDate = 25-Apr
          CultivarName = Amethyst
          SowingDepth = 50
          RowSpacing = 400
          Population = 30
```csharp
using APSIM.Shared.Utilities;
using Models.Utilities;
using Models.Soils;
using Models.PMF;
using Models.Core;
using System;
using System.Linq;

namespace Models
{
    [Serializable]
    public class Script : Model
    {
        [Link] Clock Clock;
        [Link] Fertiliser Fertiliser;
        [Link] Summary Summary;
        [Link] Plant Canola;
        [Link] Soil Soil;
        Accumulator accumulatedRain;
        
        [Description("Sowing date (d-mmm)")]
        public string SowDate { get; set; }
        [Description("Cultivar to be sown")]
        public string CultivarName { get; set; }
        [Description("Sowing depth (mm)")]
        public double SowingDepth { get; set; }
        [Description("Row spacing (mm)")]
        public double RowSpacing { get; set; }
        [Description("Plant population (/m2)")]
        public double Population { get; set; }
        
        


        [EventSubscribe("DoManagement")]
        private void OnDoManagement(object sender, EventArgs e)
        {
        
            
            if (DateUtilities.WithinDates(SowDate, Clock.Today, SowDate))
            {
                Canola.Sow(population: Population, cultivar: CultivarName, depth: SowingDepth, rowSpacing: RowSpacing);    
            }
        
        }
        
    }
}
```
        MicroClimate: a_interception=0; b_interception=1; c_interception=0; d_interception=0; SoilHeatFluxFraction=0.4; MinimumHeightDiffForNewLayer=0; NightInterceptionFraction=0.5; ReferenceHeight=1
        Irrigation
        Fertiliser
        SurfaceOrganicMatter: InitialResidueName=maize; InitialResidueType=maize; InitialResidueMass=500; InitialStandingFraction=0; InitialCPR=0; InitialCNR=65
        Manager Harvesting
```csharp
using Models.PMF.Phen;
using System;
using System.Linq;
using Models.Core;
using System.Collections.Generic;
using System.Text;
using Models.Soils;
using Models.PMF;
using Models;
using System.Xml.Serialization;
using APSIM.Shared.Utilities;

namespace Models
{
    [Serializable] 
    public class Script : Model
    {      
        [Link] private Plant Chickpea;
        [Link] private Zone zone;
        [Link(Type = LinkType.Path, Path = "[Chickpea].Phenology")]
        private Phenology phenology;
                    
        
        [EventSubscribe("StartOfSimulation")]
        private void OnSimulationCommencing(object sender, EventArgs e)
        {
        }       
        
        [EventSubscribe("DoManagement")]
        private void OnDoManagement(object sender, EventArgs e)
        {
        if (phenology.CurrentPhase.Name=="ReadyForHarvesting")
           {
           Chickpea.Harvest();
           Chickpea.EndCrop();
           }
        }
        
        [EventSubscribe("DoManagementCalculations")]
        private void OnDoManagementCalculations(object sender, EventArgs e)
        {
            
        }
    }
}
```
        Plant Chickpea
        Report FactorialReport: EventNames=[Chickpea].Harvesting
          VariableNames:
            [Clock].Today
            [Chickpea].Phenology.CurrentStageName as Stage
            [Chickpea].SowingDate.Date as SowingDate
            [Chickpea].SowingDate.DayOfYear as SowingDOY
            [Chickpea].Phenology.BuddingDAS as BuddingDAS
            [Chickpea].Phenology.FloweringDAS as FloweringDAS
            [Chickpea].Phenology.MaturityDAS as MaturityDAS
            [Chickpea].Grain.Live.Wt as GrainWt
            [Chickpea].AboveGround.Wt
            [Chickpea].Structure.BranchNumber
            mean of [Chickpea].Leaf.Fn from [Chickpea].Sowing to [Chickpea].Harvesting as AvNStressIndex
            mean of [Chickpea].Leaf.Fw from [Chickpea].Sowing to [Chickpea].Harvesting as AvWaterStressIndex
            sum of [Irrigation].IrrigationApplied from [Chickpea].Sowing to [Chickpea].Harvesting as SumIrrig
            sum of ([Soil].SoilWater.SWmm) from [Chickpea].Sowing to [Chickpea].Sowing as SowProfileWater
            [Chickpea].Phenology.PoddingDAS as PoddingDAS
            [Chickpea].Phenology.EmergenceDAS as EmergenceDAS
        Soil Black Vertosol-Mywybilla (Bongeen No001): ASCOrder=Vertosol; ASCSubOrder=Black; SoilType=Clay; Site=Bongeen; NearestTown=Bongeen, Q 4356; Region=Darling Downs and Granite Belt; State=Queensland; Country=Australia; NaturalVegetation=Qld. Bluegrass, possible Qld. Blue gum; ApsoilNumber=1; Latitude=-27.629; Longitude=151.402; LocationAccuracy=+/- 20m; DataSource=CSIRO Sustainable Ecosystems, Toowoomba
          Comments=Soil naming structure: \State\Region\Classification-Local Name (Site/district and locator number); oc and ph estimated
          Physical
            Thickness  BD    AirDry  LL15  DUL   SAT
            150        0.99  0.13    0.26  0.55  0.6
            150        1.06  0.208   0.26  0.52  0.57
            300        1.13  0.32    0.32  0.49  0.54
            300        1.11  0.32    0.32  0.5   0.55
            300        1.12  0.32    0.32  0.5   0.55
            300        1.15  0.32    0.32  0.48  0.53
            300        1.19  0.32    0.32  0.47  0.52
            SoilCrop ChickpeaSoil: LL=[0.26, 0.26, 0.34, 0.386667, 0.446667, 0.48, 0.47]; KL=[0.045, 0.045, 0.045, 0.03, 0.025, 0.02, 0.01]; XF=[1, 1, 1, 1, 1, 1, 1]
              LL source: Estimated based on local knowledge
            SoilCrop WheatSoil: LL=[0.26, 0.26, 0.34, 0.33, 0.34, 0.35, 0.37]; KL=[0.06, 0.06, 0.06, 0.04, 0.04, 0.02, 0.01]; XF=[1, 1, 1, 1, 1, 1, 1]
              LL source: Estimated based on local knowledge
            SoilCrop CottonSoil: LL=[0.26, 0.26, 0.32, 0.33, 0.38, 0.37, 0.35]; KL=[0.1, 0.1, 0.1, 0.1, 0.09, 0.07, 0.05]; XF=[1, 1, 1, 1, 1, 1, 1]
              LL source: Field measured and checked for sensibility
            SoilCrop SorghumSoil: LL=[0.26, 0.26, 0.34, 0.33, 0.34, 0.35, 0.37]; KL=[0.07, 0.07, 0.07, 0.05, 0.05, 0.04, 0.03]; XF=[1, 1, 1, 1, 1, 1, 1]
              LL source: Field measured and checked for sensibility
          WaterBalance SoilWater: SummerDate=1-Nov; SummerU=2; SummerCona=4.5; WinterDate=1-Apr; WinterU=2; WinterCona=3.9; DiffusConst=40; DiffusSlope=16; Salb=0.12; CN2Bare=73; CNRed=20; CNCov=0.8; Thickness=[150, 150, 300, 300, 300, 300, 300]; SWCON=[0.3, 0.3, 0.3, 0.3, 0.3, 0.3, 0.3]
          Nutrient
          Organic: FOMCNRatio=40
            Thickness  Carbon  SoilCNRatio  FBiom  FInert  FOM
            150        1.24    12           0.04   0.4     347.129
            150        1.24    12           0.02   0.6     270.344
            300        1.25    12           0.02   0.8     163.972
            300        1.1     12           0.02   1       99.4541
            300        0.71    12           0.01   1       60.322
            300        0.34    12           0.01   1       36.5871
            300        0.26    12           0.01   1       22.1912
          Chemical: Thickness=[150, 150, 300, 300, 300, 300, 300]; PH=[8, 8, 8, 8, 8, 8, 8]
          Sample Initial conditions: Depth=[0-180]; Thickness=[1800]; SWUnits=Volumetric; OCUnits=Total; PHUnits=Water
          CERESSoilTemperature Temperature
          Sample InitialSW: Thickness=[150, 150, 300, 300, 300, 300, 300]; SW=[0.327, 0.393, 0.457, 0.42, 0.34, 0.35, 0.37]; SWUnits=Volumetric; OCUnits=Total; PHUnits=Water
        Manager Irrigate on fixed dates
          Amount = 15
          IrrigateDates = 2-mar
          Depth = 0
          Efficiency = 1
          WillRunoff = False
```csharp
using APSIM.Shared.Utilities;
using Models.PMF;
using Models.Core;
using System;
using System.Linq;
namespace Models
{
    [Serializable]
    public class Script : Model
    {
        [Link] Clock Clock;
        [Link] Irrigation Irrigation;
        
        [Separator("A component to apply irrigation on one or more dates on every year of the simulation")]

        [Description("Enter the irrigation dates as dd-mmm with comma separation (any year information entered will be ignored)")] public string[] IrrigateDates { get; set; }
        
        [Description("Amount of irrigation to be applied (mm)")] public double Amount { get; set; }
        
        [Description("Depth in the soil to apply the  irrigation (mm)")] public double Depth { get; set; }
        
        [Description("Efficiency of irrigation (0-1)")] public double Efficiency { get; set; }
        
        [Description("Will the irrigation runoff?")] public bool WillRunoff { get; set; }
        
        [EventSubscribe("DoManagement")]
        private void OnDoManagement(object sender, EventArgs e)
        {
            foreach (string ddMMM in IrrigateDates)
            {
                if (DateUtilities.DatesEqual(ddMMM, Clock.Today))
                    Irrigation.Apply(amount: Amount, depth: Depth, efficiency: Efficiency, willRunoff: WillRunoff);
            }
        }
    }
}
```
        Manager Reset on date
          ResetDate = 1-Mar
          ResetWater = Yes
          ResetSOM = Yes
```csharp
using Models.Soils.Nutrients;
using APSIM.Shared.Utilities;
using Models.Surface;
using Models.Utilities;
using Models.Soils;
using Models.PMF;
using Models.Core;
using System;
using System.Linq;
using Models.Interfaces;

namespace Models
{
    [Serializable]
    public class Script : Model
    {
        [Link] private Clock Clock;
        [Link] private Plant Wheat;
        [Link] private ISoilWater SoilWater;
//        [Link] private Nutrient nutrient;
        [Link] private SurfaceOrganicMatter SOM;
        [Link] private Summary Summary;

        [Description("Date to reset on:")]
        public string ResetDate {get;set;}

        [Description("Reset Water? (Yes or No)")]
        public string ResetWater {get;set;}

//        [Description("Reset Soil Nutrients ? (Yes or No)")]
//        public string ResetNutrients {get;set;}

        [Description("Reset Surface Organic Matter? (Yes or No)")]
        public string ResetSOM {get;set;}

        [EventSubscribe("DoManagement")]
        private void OnDoManagement(object sender, EventArgs e)
        {
            if (DateUtilities.WithinDates(ResetDate, Clock.Today, ResetDate))
            {
                if (ResetWater == "Yes")
                {
                    Summary.WriteMessage(this, "Reset Water");
                    SoilWater.Reset();
                }
//                if (ResetNutrients == "Yes")
//                {
//                    Summary.WriteMessage(this, "Reset Nitrogen");
//                    nutrient.Reset();
//                }
                if (ResetSOM == "Yes")
                {
                    Summary.WriteMessage(this, "Reset Surface OM");
                    SOM.Reset();
                }
            }
        }
    }
}
```
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