Simulations: Version=159
  Simulation
    Clock: Start=1900-01-01; End=2000-12-31
    Summary SummaryFile
    ControlledEnvironment: MaxT=25; MinT=10; Rain=10; Radn=25; PanEvap=5; VP=2; Wind=3; CO2=350; AirPressure=1010; DiffuseFraction=0; Latitude=-27; Longitude=0; DayLength=12; SunRise=0; SunSet=0
    Zone Field: Area=1; Slope=0; AspectAngle=0; Altitude=50
      Report: EventNames=[Wheat].Harvesting
        VariableNames:
          [Clock].Today
          [Wheat].Phenology.Zadok.Stage
          [Wheat].Phenology.CurrentStageName
          [Wheat].AboveGround.Wt
          [Wheat].AboveGround.N
          [Wheat].Grain.Total.Wt*2 as Yield
          [Wheat].Grain.Protein
          [Wheat].Grain.Size
          [Wheat].Grain.Number
          [Wheat].Grain.Total.Wt
          [Wheat].Grain.Total.N
          [Wheat].Total.Wt
          [IWeather].MaxT
          [IWeather].MinT
          [IWeather].Rain
          [IWeather].Radn
          [IWeather].Wind
          [IWeather].DayLength
          [IWeather].VP
          [IWeather].CO2
      Fertiliser
      Soil: ASCOrder=Vertosol; ASCSubOrder=Black; SoilType=Clay; Site=Norwin; NearestTown=Norwin; Region=Darling Downs and Granite Belt; State=Queensland; Country=Australia; NaturalVegetation=Qld. Bluegrass, possible Qld. Blue gum; ApsoilNumber=900; Latitude=-27.581836; Longitude=151.320206; LocationAccuracy=+/- 20m
        DataSource=CSIRO Sustainable Ecosystems, Toowoomba; Characteriesd as part of the GRDC funded project"Doing it better, doing it smarter, managing soil water in Australian agriculture' 2011
        Comments=OC, CLL for all crops estimated-based on Bongeen Mywybilla Soil No1
        Physical
          Thickness  BD       AirDry    LL15      DUL       SAT       KS
          150        1.01056  0.13025   0.2605    0.521     0.588655  20
          150        1.07146  0.198689  0.248362  0.496723  0.565677  20
          300        1.09394  0.28      0.28      0.488438  0.557193  20
          300        1.15861  0.28      0.28      0.480297  0.532787  20
          300        1.17301  0.28      0.28      0.471584  0.527354  20
          300        1.16287  0.28      0.28      0.457071  0.53118   20
          300        1.1875   0.28      0.28      0.452332  0.521888  20
          SoilCrop WheatSoil: LL=[0.261, 0.248, 0.28, 0.306, 0.36, 0.392, 0.446]; KL=[0.06, 0.06, 0.06, 0.04, 0.04, 0.02, 0.01]; XF=[1, 1, 1, 1, 1, 1, 1]
        WaterBalance SoilWater: SummerDate=1-Nov; SummerU=5; SummerCona=5; WinterDate=1-Apr; WinterU=5; WinterCona=5; DiffusConst=40; DiffusSlope=16; Salb=0.12; CN2Bare=73; CNRed=20; CNCov=0.8; PSIDul=-100; Thickness=[150, 150, 300, 300, 300, 300, 300]; SWCON=[0.3, 0.3, 0.3, 0.3, 0.3, 0.3, 0.3]
        Organic: FOMCNRatio=40; CarbonUnits=Total
          Thickness  Carbon  SoilCNRatio  FBiom  FInert  FOM
          150        1.2     12           0.04   0.4     347.129
          150        0.96    12           0.02   0.6     270.344
          300        0.6     12           0.02   0.8     163.972
          300        0.3     12           0.02   1       99.4541
          300        0.18    12           0.01   1       60.322
          300        0.12    12           0.01   1       36.5871
          300        0.12    12           0.01   1       22.1912
        Chemical: Thickness=[150, 150, 300, 300, 300, 300, 300]; PH=[8, 8, 8, 8, 8, 8, 8]; PHUnits=Water
        Water: Thickness=[150, 150, 300, 300, 300, 300, 300]; FilledFromTop=false
          InitialValues=[0.521, 0.496723, 0.488438, 0.480297, 0.471584, 0.457071, 0.452332]
        CERESSoilTemperature Temperature
        Nutrient
        Solute NO3: Thickness=[150, 150, 300, 300, 300, 300, 300]; InitialValues=[10, 10, 10, 10, 10, 1, 1]; InitialValuesUnits=ppm; WaterTableConcentration=0; D0=0; DepthConstant=0; MaxDepthSoluteAccessible=0; RunoffEffectivenessAtMovingSolute=0; MaxEffectiveRunoff=0
        Solute NH4: Thickness=[150, 150, 300, 300, 300, 300, 300]; InitialValues=[0.1, 0.1, 0.1, 0.1, 0.1, 0.1, 0.1]; InitialValuesUnits=ppm; WaterTableConcentration=0; D0=0; DepthConstant=0; MaxDepthSoluteAccessible=0; RunoffEffectivenessAtMovingSolute=0; MaxEffectiveRunoff=0
        Solute Urea: Thickness=[150, 150, 300, 300, 300, 300, 300]; InitialValues=[0, 0, 0, 0, 0, 0, 0]; InitialValuesUnits=kg/ha; WaterTableConcentration=0; D0=0; DepthConstant=0; MaxDepthSoluteAccessible=0; RunoffEffectivenessAtMovingSolute=0; MaxEffectiveRunoff=0
      SurfaceOrganicMatter: InitialResidueName=wheat_stubble; InitialResidueType=wheat; InitialResidueMass=500; InitialStandingFraction=0; InitialCPR=0; InitialCNR=100
      MicroClimate: a_interception=0; b_interception=1; c_interception=0; d_interception=0; SoilHeatFluxFraction=0.4; MinimumHeightDiffForNewLayer=0; NightInterceptionFraction=0.5; ReferenceHeight=2
      Manager SowingFertiliser
        Amount = 300
        CropName = wheat
```csharp
using Models.Soils;
using System;
using Models.Core;
using Models.PMF;
namespace Models
{
    [Serializable]
    public class Script : Model
    {
        [Link] Clock Clock;
        [Link] Fertiliser Fertiliser;
        [Link] Summary Summary;
        
        
        [Description("Amount of fertiliser to be applied (kg/ha)")]
        public double Amount { get; set; }
        
        [Description("Crop to be fertilised")]
        public string CropName { get; set; }
        
        
        

        [EventSubscribe("Sowing")]
        private void OnSowing(object sender, EventArgs e)
        {
            Model crop = sender as Model;
            if (crop.Name.ToLower() == CropName.ToLower())
                Fertiliser.Apply(Amount: Amount, Type: Fertiliser.Types.NO3N);
        }
        
    }
}
```
      Manager SowingRule
        StartDate = 1-may
        EndDate = 10-jul
        MinESW = 100
        MinRain = 25
        RainDays = 7
        CultivarName = Hartog
        SowingDepth = 30
        RowSpacing = 250
        Population = 120
```csharp
using Models.Interfaces;
using System;
using Models.Core;
using Models.PMF;
using Models.Soils;
using Models.Soils.Nutrients;
using Models.Utilities;
using APSIM.Shared.Utilities;
using Models.Climate;

namespace Models
{
    [Serializable]
    public class Script : Model
    {
        [Link] private Clock Clock;
        [Link] private Fertiliser Fertiliser;
        [Link] private Summary Summary;
        [Link(ByName = true)] private Plant Wheat;
        [Link] private Soil Soil;
        private Accumulator accumulatedRain;
        [Link]
        private ISoilWater waterBalance;
        
        [Description("Start of sowing window (d-mmm)")]
        public string StartDate { get; set; }
        [Description("End of sowing window (d-mmm)")]
        public string EndDate { get; set; }
        [Description("Minimum extractable soil water for sowing (mm)")]
        public double MinESW { get; set; }
        [Description("Accumulated rainfall required for sowing (mm)")]
        public double MinRain { get; set; }
        [Description("Duration of rainfall accumulation (d)")]
        public int RainDays { get; set; }
        [Description("Cultivar to be sown")]
        [Display(Type=DisplayType.CultivarName, PlantName = "Wheat")]
        public string CultivarName { get; set; }
        [Description("Sowing depth (mm)")]
        public double SowingDepth { get; set; }
        [Description("Row spacing (mm)")]
        public double RowSpacing { get; set; }
        [Description("Plant population (/m2)")]
        public double Population { get; set; }
        
        
        [EventSubscribe("StartOfSimulation")]
        private void OnSimulationCommencing(object sender, EventArgs e)
        {
            accumulatedRain = new Accumulator(this, "[IWeather].Rain", RainDays);
        }
        

        [EventSubscribe("DoManagement")]
        private void OnDoManagement(object sender, EventArgs e)
        {
            accumulatedRain.Update();
            
            if (DateUtilities.WithinDates(StartDate, Clock.Today, EndDate) &&
                !Wheat.IsAlive &&
                MathUtilities.Sum(waterBalance.ESW) > MinESW &&
                accumulatedRain.Sum > MinRain)
            {
                Wheat.Sow(population: Population, cultivar: CultivarName, depth: SowingDepth, rowSpacing: RowSpacing);    
            }
        
        }
        
    }
}
```
      Manager Harvest
```csharp
using Models.Soils.Nutrients;
using System;
using Models.Core;
using Models.PMF;
using Models.Soils;
using Models.Soils.Nutrients;
using Models.Utilities;
using APSIM.Shared.Utilities;

namespace Models
{
    [Serializable]
    public class Script : Model
    {
        [Link(ByName = true)] Plant Wheat;

        [EventSubscribe("DoManagement")]
        private void OnDoManagement(object sender, EventArgs e)
        {
            if (Wheat.IsReadyForHarvesting)
            {
               Wheat.Harvest();
               Wheat.EndCrop();    
            }
        
        }
        
    }
}
```
      Plant Wheat: PlantType=Wheat; IsEnding=false; DaysAfterEnding=0
        Memo Introduction
          _Brown, H.E., Huth, N.I. and Holzworth, D.P._

          The APSIM wheat model has been developed using the Plant Modelling Framework (PMF) of [brown_plant_2014]. This new framework provides a library of plant organ and process submodels that can be coupled, at runtime, to construct a model in much the same way that models can be coupled to construct a simulation. This means that dynamic composition of lower level process and organ classes (e.g. photosynthesis, leaf) into larger constructions (e.g. maize, wheat, sorghum) can be achieved by the model developer without additional coding.

          The wheat model consists of:

          * a phenology model to simulate development through sequential developmental phases
          * a structure model to simulate plant morphology
          * a collection of organs to simulate the various plant parts
          * an arbitrator to allocate resources (N, biomass) to the various plant organs

          This work builds upon earlier APSIM Wheat models such as NWheat ([Asseng200225], [KeatingNWheat]), NWheatS ([Asseng1998163]), Cropmod-Wheat ([Wang2002GenericCropModel]), and the earlier versions developed in Plant (<a href=\"http://www.apsim.info/Documentation/Model,CropandSoil/CropModuleDocumentation/Wheat.aspx">APSIM Wheat 7.5</a>") and then within the Plant Modelling Framework ([brown_plant_2014]).
        OrganArbitrator Arbitrator
          BiomassTypeArbitrator DMArbitration
            Folder PotentialPartitioningMethods
              ReallocationMethod
              AllocateFixationMethod
              RetranslocationMethod
              SendPotentialDMAllocationsMethod
            Folder AllocationMethods
              NutrientConstrainedAllocationMethod
              DryMatterAllocationsMethod
            RelativeAllocation ArbitrationMethod
          BiomassTypeArbitrator NArbitration
            Folder PotentialPartitioningMethods
              ReallocationMethod
            Folder ActualPartitioningMethods
              AllocateFixationMethod
              RetranslocationMethod
            Folder AllocationMethods
              NitrogenAllocationsMethod
            RelativeAllocation ArbitrationMethod
            AllocateUptakesMethod
          WaterUptakeMethod
          NitrogenUptakeMethod
        Phenology
          Memo
            Wheat exhibits a range of developmental responses to environment and these are strongly influenced by genotype characteristics.
            Temperature is the primary driver of development, increasing development rates and decreasing phase durations as it increases.  These affects are captured by thermal time.  However, wheat also exhibits cold and photoperiod sensitivities in its Vernalisaing phase and further photoperiod sensitivity in the SpikeletDifferenation and HeadEmergence phases.  Photoperiod responses are seen as a reduction in the length of a phase for a photoperiod sensitive genotype in response to a longer photoperiod.  Vernalisation responses are more complicated as they are driven by cool temperature but interact with photoperiod.  For vernalisation sensitive varieties (Winter types), exposure to cool temperatures and/or short photoperiods during the Vernalising phase may reduce its thermal time duration.

            APSIM wheat implements the Cereal Anthesis Molecular Phenology (CAMP) model to simulate development.  It is based on the Kirby Framework which assumes the timing of anthesis is a result of the timing of flag leaf and an additional thermal time passage from there to heading then anthesis.  It also assumes the timing of flag leaf is a result of the Final Leaf Number (which sets a target) and leaf appearance rate (which sets the rate of progress toward the target).  Leaf appearance rate is a function of Thermal time and a genotype specific Phyllochron which changes with Haun stage as described by [Jamieson_LeafAppearance_1995].

            Final Leaf Number (FLN) is set on the day that terminal spikelet occurs as:

            FLN = 2.85 + 1.1 * TSHS

            Where TSHS is the Haun stage on the day terminal spikelet stage occurs.  Terminal spikelet is at the end of the SpikeletDifferentaiation phase which is preceeded by the Emerging and Vernalising phases.  The mechanisums for progress through each of these phase are described below
          HourlyInterpolation ThermalTime: agregationMethod=0
            XYPairs Response: X=[0, 26, 37]; Y=[0, 26, 0]
            Memo
              Thermal time determines the rate of developmental progress through many of the crops phases and is used by organs to determing potential growth rates.
            ThreeHourSin InterpolationMethod
          PhotoperiodFunction Photoperiod: Twilight=-6; DayLength=0
          AccumulateFunction HaunStage: StartStageName=Emergence; EndStageName=FlagLeaf; FractionRemovedOnCut=0; FractionRemovedOnHarvest=0; FractionRemovedOnGraze=0; FractionRemovedOnPrune=0
            PhaseLookup Delta
              PhaseLookupValue Growing: Start=Germination; End=HarvestRipe
                DivideFunction Value
                  VariableReference ThermalTime: VariableName=[Phenology].ThermalTime
                  VariableReference Phyllochron: VariableName=[Phenology].Phyllochron
          Constant PhyllochronPpSensitivity: FixedValue=0.6
          MultiplyFunction Phyllochron
            Memo Rational
              This is the thermal time between the emergence of leaf tips.  The model used here is based on [Jamieson_SIRIUS_1998] where leaf appearace could be described by a base phyllochron determined between leaves 2 and 7 and a phyllochron that was 70% of base phyllochron for leaves < 2 and 130% of base phyllochron for leaves > 7
            LinearInterpolationFunction LeafStageFactor
              XYPairs: X=[0, 2, 3, 7, 8, 11]; Y=[0.75, 0.75, 1, 1, 1.4, 1.4]
              VariableReference XValue: VariableName=[Leaf].AppearedCohortNo
            Constant BasePhyllochron: FixedValue=120; Units=oC.d
            AddFunction PhotoperiodEffect
              Constant One: FixedValue=1; Units=oC.d
              MultiplyFunction PhotoperiodResponse
                VariableReference PhotoperiodSensitivity: VariableName=[Phenology].PhyllochronPpSensitivity
                LinearInterpolationFunction PhotoPeriodResponseShape
                  XYPairs: X=[8, 12, 20]; Y=[1, 0, 0]
                  VariableReference XValue: VariableName=[Phenology].Photoperiod
          VariableReference FinalLeafNumber: VariableName=[Phenology].CAMP.FLN
          Constant HeadEmergencePpSensitivity: FixedValue=2
            Memo
              The phyllochrons duration for the plant to go from flag leaf ligual appearance at 16 h Pp compared to the phyllochron duration for the same phase at 8 h Pp.
          Constant HeadEmergenceLongDayBase: FixedValue=200
            Memo
              The phyllochrons duration for the plant to go from flag leaf ligual appearance at 16 h Pp.
          GerminatingPhase Germinating: Start=Sowing; End=Germination
          EmergingPhase Emerging: Start=Germination; End=Emergence; TTForTimeStep=0
            VariableReference ThermalTime: VariableName=[Phenology].ThermalTime
            AddFunction Target
              Constant ShootLag: FixedValue=40
              MultiplyFunction DepthxRate
                VariableReference SowingDepth: VariableName=[Plant].SowingData.Depth
                Constant ShootRate: FixedValue=1.5
          VernalisationPhase Vernalising: Start=Emergence; End=VernalSaturation
            Memo
              Progress through the vernalising phase is determined by the apparent expression of Vrn1 and Vrn2 genes.  The CAMP model predicts the expression of these two genes.
              Vrn1 is the gene that orchestrates cold temperature responses in development.  To complete the vernalising stage firstly apparent Vrn1 expression must reach a value of at least 1.0.  In warm temperatures (>18oC), Vrn1 is expressed at a base rate that is genotype dependent.  This base rate is lower for vernalisation sensitive genotypes which will develop slower in the warm.  Vrn1 expression (relative to Haun stage increment) increases as temperature decreases so exposure to cold conditions will cause vernalisation sensitive varieties to develop faster (i.e. reach vernalisation at a lower Haun stage).  Vrn2 is up-regulated by longer photoperiods.  It blocks the expression of Vrn3 (which is required for progression through the spikelet differentiation phase) and must be down regulated completely before the vernalising phase is complete.  Vrn1 blocks Vrn2 expression so in effect the expression of Vrn2 raises the target for Vrn1 expression above 1.0.  The longer the photoperiod the greater the target increase so exposure to short days will reduce the target and length of the vernalising phase, a phenomena some times called short day vernalisation.  Vrn3 may also be active and accelerate the expression of Vrn1 during the vernalisation phase.  This effect is currently captured by VrnX in CAMP.
              The duration of the vernalising phase will be the result of a complex interaction between temperature, photoperiod and the genotypes tendency to express Vrn1 at warm temperatures (baseDeltaVrn1) and Vrn2 and Vrn3 under long photoperiods (MaxDpVrn2, MaxDVrnX).  These three rates are derived internally by the CAMP model from the genotypes FLNparams.
          GenericPhase SpikeletDifferentiation: Start=VernalSaturation; End=TerminalSpikelet
            VariableReference Progression: VariableName=[Phenology].CAMP.dVrn3
            Constant Target: FixedValue=1
            Memo
              Progress through the Spike differentiation phase is determined by the apparent expression of Vrn3 as predicted by CAMP.
              Vrn3 is a photoperiod sensitive gene that promotes expression of Vrn1.  Vrn1 is not able to express to adequate levels to achieve reproductive transition without Vrn3 upregulation.   Here we assume an apparent Vrn3 expression of 1.0 is sufficient to upregulate Vrn1 enough to trigger terminal spikelet.
               Each genotype has a base rate of Vrn3 expression (baseDVrn3) at low photoperiods and a maximum rate of Vrn3 expression (maxDVrn3) under long photoperiods.  These two rates are derived internally by the CAMP model from the genotypes FLNparams.
          LeafAppearancePhase StemElongation: Start=TerminalSpikelet; End=FlagLeaf
            Memo
              The Final leaf number is fixed at Terminal Spikelet and leaves contune to appear at a rate set by thermal time and phyllochron until flag leaf liguale appears and this phase is completed.
            VariableReference ThermalTime: VariableName=[Phenology].ThermalTime
            VariableReference FinalLeafNumber: VariableName=[Structure].FinalLeafNumber
            ExpressionFunction LeafNumber
              Expression=[Leaf].ExpandedCohortNo + [Leaf].NextExpandingLeafProportion
            VariableReference FullyExpandedLeafNo: VariableName=[Leaf].ExpandedCohortNo
            VariableReference InitialisedLeafNumber: VariableName=[Leaf].InitialisedCohortNo
          GenericPhase HeadEmergence: Start=FlagLeaf; End=Heading
            VariableReference Progression: VariableName=[Phenology].ThermalTime
            AddFunction Target
              VariableReference LongPpBase: VariableName=[Phenology].HeadEmergenceLongDayBase.FixedValue
              MultiplyFunction ShortPpExtension
                VariableReference LongPpBase: VariableName=[Phenology].HeadEmergenceLongDayBase.FixedValue
                VariableReference PpSens: VariableName=[Phenology].HeadEmergencePpSensitivity.FixedValue
                LinearInterpolationFunction PpResponse
                  XYPairs: X=[6, 8, 20, 22]; Y=[1, 1, 0, 0]
                  VariableReference XValue: VariableName=[Phenology].Photoperiod
          GenericPhase EarlyFlowering: Start=Heading; End=Flowering
            VariableReference Progression: VariableName=[Phenology].ThermalTime
            Constant Target: FixedValue=80; Units=oCd
          GenericPhase GrainDevelopment: Start=Flowering; End=StartGrainFill
            Constant Target: FixedValue=120
            VariableReference Progression: VariableName=[Phenology].ThermalTime
          GenericPhase GrainFilling: Start=StartGrainFill; End=EndGrainFill
            Constant Target: FixedValue=545
            VariableReference Progression: VariableName=[Phenology].ThermalTime
          GenericPhase Maturing: Start=EndGrainFill; End=Maturity
            Constant Target: FixedValue=35
            VariableReference Progression: VariableName=[Phenology].ThermalTime
          GenericPhase Ripening: Start=Maturity; End=HarvestRipe
            Constant Target: FixedValue=300
            VariableReference Progression: VariableName=[Phenology].ThermalTime
          EndPhase ReadyForHarvesting: Start=HarvestRipe; End=Unused
            VariableReference ThermalTime: VariableName=[Phenology].ThermalTime
          ZadokPMFWheat Zadok
          OnEventFunction EmergenceDAS: SetEvent=Emergence; ReSetEvent=never
            Memo
              A function is used to provide flowering date as days after sowing(DAS).
            Constant PreEventValue: FixedValue=0
            VariableReference PostEventValue: VariableName=[Plant].DaysAfterSowing
          OnEventFunction TerminalSpikeletDAS: SetEvent=TerminalSpikelet; ReSetEvent=never
            Memo
              A function is used to provide flowering date as days after sowing(DAS).
            Constant PreEventValue: FixedValue=0
            VariableReference PostEventValue: VariableName=[Plant].DaysAfterSowing
          OnEventFunction FlagLeafDAS: SetEvent=FlagLeaf; ReSetEvent=never
            Memo
              A function is used to provide flowering date as days after sowing(DAS).
            Constant PreEventValue: FixedValue=0
            VariableReference PostEventValue: VariableName=[Plant].DaysAfterSowing
          OnEventFunction HeadingDAS: SetEvent=Heading; ReSetEvent=never
            Memo
              A function is used to provide heading date as days after sowing(DAS).
            Constant PreEventValue: FixedValue=0
            VariableReference PostEventValue: VariableName=[Plant].DaysAfterSowing
          OnEventFunction FloweringDAS: SetEvent=Flowering; ReSetEvent=Germination
            Memo
              A function is used to provide flowering date as days after sowing(DAS).
            Constant PreEventValue: FixedValue=0
            VariableReference PostEventValue: VariableName=[Plant].DaysAfterSowing
          OnEventFunction MaturityDAS: SetEvent=Maturity; ReSetEvent=never
            Memo
              A function is used to provide maturity date as days after sowing(DAS).
            Constant PreEventValue: FixedValue=0
            VariableReference PostEventValue: VariableName=[Plant].DaysAfterSowing
          DivideFunction PTQ
            MultiplyFunction Radn_mol_per_m2
              VariableReference SolarRadiation: VariableName=[IWeather].Radn
              Constant: FixedValue=2.285
              VariableReference RUE Temp factor: VariableName=[Leaf].Photosynthesis.FT
              Memo
                Multiply Radn (MJ/m2/d) by 4.57 to convert to mol/m2/day and divide by 2 to convert to mol PAR/m2/d
            VariableReference ThermalTime: VariableName=[Phenology].ThermalTime
          CAMP
            VariableReference Tt: VariableName=[Phenology].ThermalTime
            LinearInterpolationFunction PpResponse
              XYPairs: X=[0, 8, 16, 24]; Y=[0, 0, 1, 1]
              VariableReference XValue: VariableName=[Phenology].Photoperiod
            HourlyInterpolation DailyColdVrn1: agregationMethod=1
              ColdUpRegVrn1 Response
                Constant k: FixedValue=-0.17; Units=/oCd
                Constant DeVernalisationTemp: FixedValue=20; Units=/oCd
                Constant DeVernalisationRate: FixedValue=0; Units=/oCd
              HourlySinPpAdjusted InterpolationMethod
            FinalLeafNumberSet FLNparams: MinLN=8.3; PpLN=3.8; VrnLN=5; VxPLN=-2
            FLNParameterEnvironment EnvData: VrnTreatTemp=6; VrnTreatDuration=60; TreatmentPTQ_L=1.2; TreatmentPTQ_S=0.6; TtEmerge=90
            CalcCAMPVrnRates
            Memo
              The CAMP model was derived to integrate molecular and physiological models of cereal flowering time to better capture G x E x M interactions and to provide a framework for linking genetic data to field behaviour.  It calculates the current levels of expression of Vrn1, 2 and 3 genes from daily deltas that are all calculated relative to haun stage deltas in addition to temperature (Vrn1) and photoperiod (Vrn 2 and 3).  To reach the vernalisation stage Vrn1 must be upregulated to a value of at least 1.0.  Where Vrn2 is also being expressed the target for Vrn1 expression increases in parallel as more Vrn1 expression is needed to block Vrn2 and allow Vrn3 expression.  Once Vrn2 expression is blocked Vrn3 will be upregulated and terminal spikelet occurs when its apparent expression reaches 1.0.  CAMP also predicts expression of VrnX which represents the relative contributions of Vrn2 and Vrn3 prior to vernalisation.  The genotype specific rates of gene expression are derived from final leaf number parameters (FLNparams):

              MinLN - The final leaf number (FLN) of the genotype when fully vernalised early and grown under long (>=16) photoperiod following vernalisation (FLN_LV).  These conditions maximise the expression of vernalisation and photoperiod genes and this parameter provides a measure of inherent earliness of the genotype. It may vary between 5 and 15 leaves (7 is typical).

              PpLN - The difference between MinLN and the FLN of a genotype when fully vernalised early and grown under short (<=8h) photoperiod following vernalisation (FLN_SV).  These conditions maximise Vrn1 expression but minimise Vrn2 and 3 expression and PpLN provides a measure of photoperiod sensitivity of the genotype.  It may vary between 0 and 8 leaves with 1 being typical of a low sensitivity genotype and 4 being typical of a high sensitivity genotype.

              VrnLN - The difference between MinLN and the FLN – PpLN of the genotype when not vernalised and grown under short photoperiod (FLN_SN).  These conditions minimise Vrn and Pp gene expression to base (minimal) values and VrnLN is a measure of vernalisation sensitivity of the genotype.  It may vary between 0 and 9 leaves with 1 being typical for an insensitive variety and 5 being typical for a sensitive variety.

              VxPLN - The difference between MinLN + VrnLN and the FLN of the genotype when not vernalised and grown under long photoperiod (FLN_LN).  These conditions minimise upregulation of Vrn1 and maximise upregulation of Vrn2 and 3 and this parameter provides a measure of the relative activities of Vrn2 and Vrn3 during the vernalisation phase. A positive value shows short days accelerate vernalisation and a negative value shows short days slow vernalisation.  The value of VxPLN should be greater than the negative of VrnLN and typically varies between +2 and -4.
        Structure: CohortInitialisationStage=Germination; LeafInitialisationStage=Emergence
          VariableReference ThermalTime: VariableName=[Phenology].ThermalTime
          MultiplyFunction BranchingRate
            Memo
              Potential branching rate is determined by the commonly observed pattern of tillering in wheat, in which each tiller emerges with the third leaf on its parent axis (e.g. first tiller emerges at the same time as the third leaf on the main stem, the first secondary tiller appears with the third leaf on tiller 1).  This is described as a simple function of main stem leaf number.
            PhaseLookup PotentialBranchingRate
              PhaseLookupValue Vegetative: Start=Emergence; End=TerminalSpikelet
                LinearInterpolationFunction PotentialBranchingRate
                  XYPairs: X=[1, 2, 3, 4, 5, 6, 7, 8]; Y=[0, 0, 1, 2, 4, 7, 12, 20]
                  VariableReference XValue: VariableName=[Structure].LeafTipsAppeared
              PhaseLookupValue Reproductive: Start=TerminalSpikelet; End=HarvestRipe
                Constant Zero: FixedValue=0
            MinimumFunction StressFactors
              LinearInterpolationFunction NitrogenEffect
                Memo
                  Inadequate Nitrogen supply is assumed to affect tillering prior to any effect on photosynthesis or leaf size.
                XYPairs: X=[0.5, 2, 3]; Y=[0, 1, 1]
                VariableReference XValue: VariableName=[Arbitrator].FN
              LinearInterpolationFunction CoverEffect
                Memo
                  Tillering is said to cease once a threshold fraction of incoming radiation has been achieved.  This captures shading effects on tillering described by [evers2006cessation].
                XYPairs: X=[0, 0.1, 0.25]; Y=[1, 1, 0]
                VariableReference XValue: VariableName=[Leaf].CoverTotal
              LinearInterpolationFunction WaterStressEffect
                XYPairs: X=[0, 1]; Y=[0, 1]
                VariableReference XValue: VariableName=[Root].WaterTensionFactor
          PhaseLookup BranchMortality
            PhaseLookupValue MortalityPhase: Start=FlagLeaf; End=Flowering
              MultiplyFunction Mortality
                LinearInterpolationFunction MortalityPerDegDay
                  XYPairs: X=[0, 0.005]; Y=[0.002, 0]
                  VariableReference XValue: VariableName=[Structure].MeanTillerGrowthRate
                VariableReference ThermalTime: VariableName=[Phenology].ThermalTime
          HeightFunction HeightModel
            LinearInterpolationFunction PotentialHeight
              XYPairs: X=[3, 4, 5, 6]; Y=[10, 200, 200, 1000]
              VariableReference XValue: VariableName=[Phenology].Stage
            LinearInterpolationFunction WaterStress
              XYPairs: X=[0.3, 1]; Y=[0, 1]
              VariableReference XValue: VariableName=[Leaf].Fw
          MovingAverageFunction MeanTillerGrowthRate: NumberOfDays=5; StageToStartMovingAverage=Emergence
            Memo
              This is calculated to represent the supply of asslimilate to individual tillers over the past 5 days to use as an index to determine tiller mortality.  When tiller numbers are high or total crop assimilate supply is small there will not be enough assimilate to maintain all of the tillers so the model will senesce some.
            DivideFunction TillerGrowthRate
              VariableReference DailyGrowth: VariableName=[Arbitrator].DM.TotalFixationSupply
              VariableReference ThermalTime: VariableName=[Phenology].ThermalTime
              VariableReference StemPopulation: VariableName=[Structure].TotalStemPopn
          MovingAverageFunction MeanPhyllochron: NumberOfDays=300; StageToStartMovingAverage=Emergence
            VariableReference Phyllochron: VariableName=[Phenology].Phyllochron
          Constant StemSenescenceAge: FixedValue=0
          Constant MaxLAR: FixedValue=0.021
          VariableReference FinalLeafNumber: VariableName=[Phenology].FinalLeafNumber
          VariableReference Phyllochron: VariableName=[Phenology].Phyllochron
        Root: GrowthRespiration=0; MaintenanceRespiration=0
          RootShapeCylinder RootShape
          Constant DMConversionEfficiency: FixedValue=1
          Constant RemobilisationCost: FixedValue=0
          Constant KLModifier: FixedValue=1
          Constant SoilWaterEffect: FixedValue=1
          Constant MaxDailyNUptake: FixedValue=20
          Constant SenescenceRate: FixedValue=0.005
          Constant MaximumRootDepth: FixedValue=1000000
          Constant MaximumNConc: FixedValue=0.01
          Constant MinimumNConc: FixedValue=0.01
          PhaseLookupValue NitrogenDemandSwitch: Start=Germination; End=Maturity
            Constant: FixedValue=1
          BiomassRemoval BiomassRemovalDefaults
            OrganBiomassRemovalType Harvest: FractionLiveToRemove=0; FractionDeadToRemove=0; FractionLiveToResidue=0.2; FractionDeadToResidue=0
            OrganBiomassRemovalType Cut: FractionLiveToRemove=0; FractionDeadToRemove=0; FractionLiveToResidue=0.3; FractionDeadToResidue=0
            OrganBiomassRemovalType Prune: FractionLiveToRemove=0; FractionDeadToRemove=0; FractionLiveToResidue=0.1; FractionDeadToResidue=0
            OrganBiomassRemovalType Graze: FractionLiveToRemove=0; FractionDeadToRemove=0; FractionLiveToResidue=0.15; FractionDeadToResidue=0
            OrganBiomassRemovalType Thin: FractionLiveToRemove=0; FractionDeadToRemove=0; FractionLiveToResidue=0.05; FractionDeadToResidue=0
          Constant KNO3: FixedValue=0.02
          Constant KNH4: FixedValue=0.01
          Constant SpecificRootLength: FixedValue=105; Units=m/g
          MultiplyFunction RootFrontVelocity
            PhaseLookup PotentialRootFrontVelocity
              PhaseLookupValue PreEmergence: Start=Germination; End=Emergence
                Constant Value: FixedValue=5; Units=mm/d
              PhaseLookupValue PostEmergence: Start=Emergence; End=Maturity
                Constant Value: FixedValue=20; Units=mm/d
            WeightedTemperatureFunction TemperatureFactor: MaximumTemperatureWeighting=0.5
              XYPairs: X=[0, 15, 25, 35]; Y=[0, 1, 1, 0]
            LinearInterpolationFunction WaterFactor
              SoilWaterScale XValue
              XYPairs: X=[0, 0.25, 1]; Y=[0, 1, 1]
          MinimumFunction NUptakeSWFactor
            SoilWaterScale
            Constant One: FixedValue=1
          Constant CarbonConcentration: FixedValue=0.4
          Constant MaintenanceRespirationFunction: FixedValue=0
          NutrientDemandFunctions DMDemands
            MultiplyFunction Structural
              PartitionFractionDemandFunction DMDemandFunction
                PhaseLookup PartitionFraction
                  PhaseLookupValue PreEmergence: Start=Germination; End=Emergence
                    Constant Value: FixedValue=0
                  PhaseLookupValue PreFlowering: Start=Emergence; End=Flowering
                    LinearInterpolationFunction AgeFactor
                      XYPairs: X=[3, 5, 6]; Y=[0.5, 0.2, 0.2]
                      VariableReference XValue: VariableName=[Phenology].Stage
                  PhaseLookupValue PostFlowering: Start=Flowering; End=EndGrainFill
                    Constant Value: FixedValue=0.2
              Constant StructuralFraction: FixedValue=1
            Constant Metabolic: FixedValue=0
            StorageDMDemandFunction Storage
              SubtractFunction StorageFraction
                Constant One: FixedValue=1
                VariableReference StructuralFraction: VariableName=[Root].DMDemands.Structural.StructuralFraction
            Constant QStructuralPriority: FixedValue=1
            Constant QMetabolicPriority: FixedValue=1
            Constant QStoragePriority: FixedValue=1
          NutrientDemandFunctions NDemands
            MultiplyFunction Structural
              VariableReference MinNconc: VariableName=[Root].minimumNconc
              VariableReference PotentialDMAllocation: VariableName=[Root].potentialDMAllocation.Structural
            MultiplyFunction Metabolic
              SubtractFunction MetabolicNconc
                VariableReference CritNconc: VariableName=[Root].criticalNConc
                VariableReference MinNconc: VariableName=[Root].minimumNconc
              VariableReference PotentialDMAllocation: VariableName=[Root].potentialDMAllocation.Structural
            StorageNDemandFunction Storage
              VariableReference NitrogenDemandSwitch: VariableName=[Root].nitrogenDemandSwitch
              VariableReference MaxNconc: VariableName=[Root].maximumNconc
            Constant QStructuralPriority: FixedValue=1
            Constant QMetabolicPriority: FixedValue=1
            Constant QStoragePriority: FixedValue=1
          VariableReference CriticalNConc: VariableName=[Root].MinimumNConc
          NutrientPoolFunctions InitialWt
            Constant Structural: FixedValue=0.005; Units=g/plant
            Constant Metabolic: FixedValue=0
            Constant Storage: FixedValue=0
        ReproductiveOrgan Grain: GrowthRespiration=0; MaintenanceRespiration=0; RipeStage=Ripe
          Biomass Live
          Biomass Dead
          LinearInterpolationFunction FTmax
            XYPairs: X=[0, 26, 40]; Y=[1, 1, 0]
            VariableReference XValue: VariableName=[IWeather].MaxT
          PhaseLookup FrostLoss
            HoldFunction GrainNumber: WhenToHold=StartGrainFill
              MinimumFunction GNFrostLoss
                Constant One: FixedValue=1
                AccumulateFunction CumulativeFrostLoss: StartStageName=Sowing; EndStageName=StartGrainFill; FractionRemovedOnCut=0; FractionRemovedOnHarvest=0; FractionRemovedOnGraze=0; FractionRemovedOnPrune=0
                  MultiplyFunction DailyFrostLoss
                    LinearInterpolationFunction FMinT
                      XYPairs: X=[-6, -4, 1, 6]; Y=[1, 1, 0, 0]
                      VariableReference XValue: VariableName=[IWeather].MinT
                    LinearInterpolationFunction FStageFrost
                      XYPairs: X=[0, 45, 55, 80, 89, 90]; Y=[0, 0, 0.9, 0.9, 0, 0]
                      VariableReference XValue: VariableName=[Phenology].Zadok.Stage
            HoldFunction GrainSize: WhenToHold=EndGrainFill
              MinimumFunction GWFrostLoss
                Constant One: FixedValue=1
                AccumulateFunction CumulativeFrostLoss: StartStageName=StartGrainFill; EndStageName=EndGrainFill; FractionRemovedOnCut=0; FractionRemovedOnHarvest=0; FractionRemovedOnGraze=0; FractionRemovedOnPrune=0
                  MultiplyFunction DailyFrostLoss: same as Simulation.Field.Wheat.Grain.FrostLoss.GrainNumber.GNFrostLoss.CumulativeFrostLoss.DailyFrostLoss
          HoldFunction NumberFunction: WhenToHold=StartGrainFill
            MultiplyFunction GrainNumber
              Constant GrainsPerGramOfStem: FixedValue=26; Units=grains
              VariableReference StemMass: VariableName=[StemPlusSpike].Wt
              SubtractFunction HeatFactor
                Constant One: FixedValue=1
                AddFunction HeatLoss
                  MultiplyFunction MainStem
                    Constant Share: FixedValue=0.384615
                    AccumulateFunction CumulativeLoss: StartStageName=Emergence; EndStageName=Maturity; FractionRemovedOnCut=0; FractionRemovedOnHarvest=0; FractionRemovedOnGraze=0; FractionRemovedOnPrune=0
                      MultiplyFunction DailyLoss
                        ExpressionFunction DailyLossPart1: Expression=(1-[Grain].FTmax) / 7
                        LinearInterpolationFunction FStageGN
                          XYPairs: X=[46, 53, 60]; Y=[0, 1, 0]
                          VariableReference XValue: VariableName=[Phenology].Zadok.Stage
                  MultiplyFunction FirstTiller
                    Constant Share: FixedValue=0.307692
                    AccumulateFunction CumulativeLoss: StartStageName=Emergence; EndStageName=Maturity; FractionRemovedOnCut=0; FractionRemovedOnHarvest=0; FractionRemovedOnGraze=0; FractionRemovedOnPrune=0
                      MultiplyFunction DailyLoss
                        ExpressionFunction DailyLossPart1: Expression=(1-[Grain].FTmax) / 7
                        LinearInterpolationFunction FStageGN
                          XYPairs: X=[51, 58, 65]; Y=[0, 1, 0]
                          VariableReference XValue: VariableName=[Phenology].Zadok.Stage
                  MultiplyFunction SecondTiller
                    Constant Share: FixedValue=0.307692
                    AccumulateFunction CumulativeLoss: StartStageName=Emergence; EndStageName=Maturity; FractionRemovedOnCut=0; FractionRemovedOnHarvest=0; FractionRemovedOnGraze=0; FractionRemovedOnPrune=0
                      MultiplyFunction DailyLoss
                        ExpressionFunction DailyLossPart1: Expression=(1-[Grain].FTmax) / 7
                        LinearInterpolationFunction FStageGN
                          XYPairs: X=[56, 63, 70]; Y=[0, 1, 0]
                          VariableReference XValue: VariableName=[Phenology].Zadok.Stage
              SubtractFunction FrostFactor
                Constant One: FixedValue=1
                VariableReference FrostLoss: VariableName=[FrostLoss].GrainNumber
          MinimumFunction GWHeatLoss
            Constant One: FixedValue=1
            AccumulateFunction GrainSizeHeatLoss: StartStageName=Flowering; EndStageName=EndGrainFill; FractionRemovedOnCut=0; FractionRemovedOnHarvest=0; FractionRemovedOnGraze=0; FractionRemovedOnPrune=0
              MultiplyFunction DailyLoss
                ExpressionFunction Part1: Expression=(1-[FTmax]) / 7
                LinearInterpolationFunction FStageGF
                  XYPairs: X=[0, 40, 140, 550, 700]; Y=[0, 1, 1, 0, 0]
                  AccumulateFunction XValue: StartStageName=Flowering; EndStageName=HarvestRipe; FractionRemovedOnCut=0; FractionRemovedOnHarvest=0; FractionRemovedOnGraze=0; FractionRemovedOnPrune=0
                    VariableReference DailyThermalTime: VariableName=[Phenology].ThermalTime
          PhaseLookup DMDemandFunction
            PhaseLookupValue InitialPhase: Start=Flowering; End=StartGrainFill
              FillingRateFunction
                VariableReference NumberFunction: VariableName=[Grain].NumberFunction
                VariableReference FillingDuration: VariableName=[Phenology].GrainDevelopment.Target
                VariableReference ThermalTime: VariableName=[Phenology].ThermalTime
                MultiplyFunction PotentialSizeIncrement
                  VariableReference InitialProportion: VariableName=[Grain].InitialGrainProportion
                  VariableReference MaximumSize: VariableName=[Grain].MaximumPotentialGrainSize
            PhaseLookupValue LinearPhase: Start=StartGrainFill; End=EndGrainFill
              FillingRateFunction
                VariableReference NumberFunction: VariableName=[Grain].NumberFunction
                VariableReference FillingDuration: VariableName=[Phenology].GrainFilling.Target
                VariableReference ThermalTime: VariableName=[Phenology].ThermalTime
                MultiplyFunction PotentialSizeIncrement
                  SubtractFunction ProportionLinearPhase
                    Constant One: FixedValue=1
                    VariableReference InitialProportion: VariableName=[Grain].InitialGrainProportion
                  VariableReference MaximumSize: VariableName=[Grain].MaximumPotentialGrainSize
          MultiplyFunction MaximumPotentialGrainSize
            Constant MaximumSize: FixedValue=0.05; Units=g
            SubtractFunction HeatFactor
              Constant One: FixedValue=1
              VariableReference CumulativeHeatLoss: VariableName=[Grain].GWHeatLoss
            SubtractFunction FrostFactor
              Constant One: FixedValue=1
              VariableReference CumulativeFrostLoss: VariableName=[FrostLoss].GrainSize
          Constant DMConversionEfficiency: FixedValue=1
          Constant RemobilisationCost: FixedValue=0
          Constant InitialGrainProportion: FixedValue=0.05
          Constant MinimumNConc: FixedValue=0.0123
          Constant MaxNConcDailyGrowth: FixedValue=0.03
          Constant MaximumNConc: FixedValue=0.03
          PhaseLookup NFillingRate
            PhaseLookupValue GrainFilling: Start=Flowering; End=EndGrainFill
              FillingRateFunction
                VariableReference NumberFunction: VariableName=[Grain].NumberFunction
                AddFunction FillingDuration
                  VariableReference FloweringToGrainFilling: VariableName=[Phenology].GrainDevelopment.Target
                  VariableReference GrainFilling: VariableName=[Phenology].GrainFilling.Target
                VariableReference ThermalTime: VariableName=[Phenology].ThermalTime
                MultiplyFunction PotentialSizeIncrement
                  VariableReference MaximumSize: VariableName=[Grain].MaximumPotentialGrainSize
                  VariableReference MaximumNConc: VariableName=[Grain].MaximumNConc
          Constant WaterContent: FixedValue=0.12
          AccumulateFunction AccumThermalTime: StartStageName=Flowering; EndStageName=Maturity; FractionRemovedOnCut=0; FractionRemovedOnHarvest=0; FractionRemovedOnGraze=0; FractionRemovedOnPrune=0
            VariableReference DailyThermalTimeValue: VariableName=[Phenology].ThermalTime
          ExpressionFunction Protein
            Expression=([Grain].Live.N + [Grain].Dead.N)/([Grain].Live.Wt + [Grain].Dead.Wt) * 100 * 5.71
          BiomassRemoval BiomassRemovalDefaults
            OrganBiomassRemovalType Harvest: FractionLiveToRemove=1; FractionDeadToRemove=0; FractionLiveToResidue=0; FractionDeadToResidue=0
            OrganBiomassRemovalType Cut: FractionLiveToRemove=1; FractionDeadToRemove=0; FractionLiveToResidue=0; FractionDeadToResidue=0
            OrganBiomassRemovalType Prune: FractionLiveToRemove=0; FractionDeadToRemove=0; FractionLiveToResidue=0.8; FractionDeadToResidue=0
            OrganBiomassRemovalType Graze: FractionLiveToRemove=0.6; FractionDeadToRemove=0; FractionLiveToResidue=0.2; FractionDeadToResidue=0
            OrganBiomassRemovalType Thin: FractionLiveToRemove=0; FractionDeadToRemove=0; FractionLiveToResidue=0.05; FractionDeadToResidue=0
          Constant CarbonConcentration: FixedValue=0.4
          NutrientPoolFunctions DMDemandPriorityFactors
            Constant Structural: FixedValue=1
            Constant Metabolic: FixedValue=1
            Constant Storage: FixedValue=1
          NutrientPoolFunctions NDemandPriorityFactors: same as Simulation.Field.Wheat.Grain.DMDemandPriorityFactors
        Leaf: MaxCover=1; Albedo=0.25; Gsmax350=0.011; R50=150; KDead=0.1; MaximumMainStemLeafNumber=30
          zero: CurrentExpandingLeaf, StartFractionExpanded, FractionNextleafExpanded, DeadNodesYesterday, GrowthRespiration, LAI, Depth, Width, FRGR, PotentialEP, WaterDemand, TipsAtEmergence, CohortsAtInitialisation, FractionDied
          RUEModel Photosynthesis
            Constant RUE: FixedValue=1.5
            WeightedTemperatureFunction FT: MaximumTemperatureWeighting=0.75
              XYPairs: X=[0, 15, 25, 35]; Y=[0, 1, 1, 0]
            LinearInterpolationFunction FN
              XYPairs: X=[0, 1, 1.5]; Y=[0, 1, 1]
              VariableReference XValue: VariableName=[Leaf].Fn
            LinearInterpolationFunction FW
              XYPairs: X=[0, 1, 1]; Y=[0, 1, 1]
              VariableReference XValue: VariableName=[Leaf].Fw
            LinearInterpolationFunction FVPD
              DailyMeanVPD DailyVPD: MaximumVPDWeight=0.66
              XYPairs: X=[0, 10, 40]; Y=[1, 1, 0]
              VariableReference XValue: VariableName=[DailyVPD]
            RUECO2Function FCO2: PhotosyntheticPathway=C3
            VariableReference RadnInt: VariableName=[Leaf].RadiationIntercepted
          StomatalConductanceCO2Modifier
            VariableReference PhotosynthesisCO2Modifier: VariableName=[Leaf].Photosynthesis.FCO2
          LeafCohort InitialLeaves[1]: Rank=1; Area=200
            zero: NReallocationFactor, DMReallocationFactor, NRetranslocationFactor, DMRetranslocationFactor, ShadeInducedSenRate, SenescedFrac, DeltaPotentialArea, DeltaStressConstrainedArea, DeltaCarbonConstrainedArea, PotentialStructuralDMAllocation, PotentialMetabolicDMAllocation, MetabolicNReallocated, MetabolicWtReallocated, StorageNReallocated, StorageWtReallocated, MetabolicNRetranslocated, StorageNRetrasnlocated, DMRetranslocated, MetabolicNAllocation, StructuralDMAllocation, MetabolicDMAllocation
          LeafCohort InitialLeaves[2]: Rank=2
            zero: NReallocationFactor, DMReallocationFactor, NRetranslocationFactor, DMRetranslocationFactor, ShadeInducedSenRate, SenescedFrac, DeltaPotentialArea, DeltaStressConstrainedArea, DeltaCarbonConstrainedArea, PotentialStructuralDMAllocation, PotentialMetabolicDMAllocation, MetabolicNReallocated, MetabolicWtReallocated, StorageNReallocated, StorageWtReallocated, MetabolicNRetranslocated, StorageNRetrasnlocated, DMRetranslocated, MetabolicNAllocation, StructuralDMAllocation, MetabolicDMAllocation, Area
          LeafCohortParameters CohortParameters: ExpansionStressValue=0; CellDivisionStressValue=0; LagAccelerationValue=0; SenescenceAccelerationValue=0; ShadeInducedSenescenceRateValue=0; SenessingLeafRelativeSizeValue=0
            Constant NReallocationFactor: FixedValue=1
            Constant RemobilisationCost: FixedValue=0
            Constant MaintenanceRespirationFunction: FixedValue=0
            Constant NRetranslocationFactor: FixedValue=0.03
            Constant DMReallocationFactor: FixedValue=1
            Constant DMRetranslocationFactor: FixedValue=1
            MinimumFunction CellDivisionStress
              LinearInterpolationFunction WaterStressEffect
                XYPairs: X=[0.5, 1]; Y=[0.1, 1]
                VariableReference XValue: VariableName=[Leaf].Fw
              LinearInterpolationFunction NitrogenStressEffect
                XYPairs: X=[0, 0.5, 1]; Y=[0.1, 0.1, 1]
                VariableReference XValue: VariableName=[Wheat].Leaf.Fn
            MinimumFunction ExpansionStress
              LinearInterpolationFunction WaterStressEffect
                XYPairs: X=[0.1, 1.1, 1.3]; Y=[0, 1, 1]
                VariableReference XValue: VariableName=[Root].WaterTensionFactor
              LinearInterpolationFunction TemperatureEffect
                XYPairs: X=[0, 12, 14]; Y=[0, 1, 1]
                VariableReference XValue: VariableName=[IWeather].MeanT
              LinearInterpolationFunction NitrogenStressEffect
                XYPairs: X=[0, 0.5, 1]; Y=[0.1, 0.1, 1]
                VariableReference XValue: VariableName=[Wheat].Leaf.Fn
            MultiplyFunction MaxArea
              Constant AreaLargestLeaves: FixedValue=2600; Units=mm^2
              LinearInterpolationFunction AgeFactor
                XYPairs: X=[3, 4, 5, 6]; Y=[0.1, 0.5, 1, 1]
                VariableReference XValue: VariableName=[Phenology].Stage
            MultiplyFunction GrowthDuration
              Constant: FixedValue=1.3
              VariableReference Phyllochron: VariableName=[Phenology].Phyllochron
            MultiplyFunction LagDuration
              LinearInterpolationFunction AgeFactor
                XYPairs: X=[3, 4, 5]; Y=[0.4, 0.7, 1]
                VariableReference XValue: VariableName=[Phenology].Stage
              SubtractFunction LastLeafDuration
                AddFunction ThermalTimeToRipe
                  VariableReference HeadEmergence: VariableName=[Phenology].HeadEmergence.Target
                  VariableReference EarlyFlowering: VariableName=[Phenology].EarlyFlowering.Target
                  VariableReference GrainDevelopment: VariableName=[Phenology].GrainDevelopment.Target
                  VariableReference GrainFilling: VariableName=[Phenology].GrainFilling.Target
                  VariableReference Maturing: VariableName=[Phenology].Maturing.Target
                  VariableReference Ripening: VariableName=[Phenology].Ripening.Target
                VariableReference SenescenceDuration: VariableName=[Leaf].CohortParameters.SenescenceDuration
            MultiplyFunction SenescenceDuration
              Constant: FixedValue=3
              VariableReference Phyllochron: VariableName=[Phenology].Phyllochron
            Constant DetachmentLagDuration: FixedValue=1000000
            Constant DetachmentDuration: FixedValue=1000000
            Constant RelativeBranchLeafSize: FixedValue=1
            LinearInterpolationFunction MaximumNConc
              XYPairs: X=[3, 4.5, 6, 8]; Y=[0.05, 0.05, 0.035, 0.02]
              VariableReference XValue: VariableName=[Phenology].Stage
            MultiplyFunction CriticalNConc
              LinearInterpolationFunction CriticalNConcAt350ppm
                XYPairs: X=[3, 4, 5, 6, 7, 8]; Y=[0.04, 0.04, 0.04, 0.0275, 0.015, 0.015]
                VariableReference XValue: VariableName=[Phenology].Stage
              LinearInterpolationFunction CO2Factor
                XYPairs: X=[350, 700]; Y=[1, 0.93]
                VariableReference XValue: VariableName=[IWeather].CO2
            LinearInterpolationFunction MinimumNConc
              XYPairs: X=[3, 4, 5, 6, 7, 8]; Y=[0.01, 0.01, 0.01, 0.01, 0.01, 0.01]
              VariableReference XValue: VariableName=[Phenology].Stage
            AddFunction LagAcceleration
              Constant One: FixedValue=1
              MultiplyFunction Stress
                Constant StressResponseCoefficient: FixedValue=1
                LinearInterpolationFunction StressFactor
                  XYPairs: X=[0, 1]; Y=[2, 0]
                  VariableReference XValue: VariableName=[Leaf].Fw
            AddFunction SenescenceAcceleration: same as Simulation.Field.Wheat.Leaf.CohortParameters.LagAcceleration
            LinearInterpolationFunction SpecificLeafAreaMax
              XYPairs: X=[3, 5, 6, 8, 9, 10]; Y=[17000, 20000, 20000, 18500, 17000, 17000]
              VariableReference XValue: VariableName=[Phenology].Stage
            LinearInterpolationFunction SpecificLeafAreaMin
              XYPairs: X=[0.4, 1]; Y=[14000, 14000]
              VariableReference XValue: VariableName=[Leaf].Fn
            Constant InitialNConc: FixedValue=0
            Constant StructuralFraction: FixedValue=0.5
            Constant StorageFraction: FixedValue=0.3
            Constant LeafSizeShapeParameter: FixedValue=0.3
            Constant SenessingLeafRelativeSize: FixedValue=1; Units=0-1
            Constant ShadeInducedSenescenceRate: FixedValue=0
            ArrayFunction LagDurationAgeMultiplier: Values=1 1 1
            ArrayFunction SenescenceDurationAgeMultiplier: Values=1 1 1
            ArrayFunction LeafSizeAgeMultiplier: Values=1 1 1 1 1 1 1 1 1 1 1 1
          Constant RemobilisationCost: FixedValue=0
          Constant FrostFraction: FixedValue=0
          VariableReference ThermalTime: VariableName=[Phenology].ThermalTime
          MinimumFunction FRGRFunction
            WeightedTemperatureFunction FT: MaximumTemperatureWeighting=0.75
              XYPairs: X=[0, 15, 25, 35]; Y=[0, 1, 1, 0]
            LinearInterpolationFunction FN
              XYPairs: X=[0, 1, 1.5]; Y=[0, 1, 1]
              VariableReference XValue: VariableName=[Leaf].Fn
            LinearInterpolationFunction FVPD: same as Simulation.Field.Wheat.Leaf.Photosynthesis.FVPD
          BiomassRemoval BiomassRemovalDefaults
            OrganBiomassRemovalType Harvest: FractionLiveToRemove=0; FractionDeadToRemove=0; FractionLiveToResidue=0.3; FractionDeadToResidue=0.3
            OrganBiomassRemovalType Cut: FractionLiveToRemove=0.8; FractionDeadToRemove=0.8; FractionLiveToResidue=0; FractionDeadToResidue=0
            OrganBiomassRemovalType Prune: FractionLiveToRemove=0; FractionDeadToRemove=0; FractionLiveToResidue=0.6; FractionDeadToResidue=0.6
            OrganBiomassRemovalType Graze: FractionLiveToRemove=0.6; FractionDeadToRemove=0.6; FractionLiveToResidue=0.1; FractionDeadToResidue=0.1
            OrganBiomassRemovalType Thin: FractionLiveToRemove=0; FractionDeadToRemove=0; FractionLiveToResidue=0.05; FractionDeadToResidue=0.05
          MultiplyFunction ExtinctionCoeff
            Constant VegetativePhase: FixedValue=0.5
            LinearInterpolationFunction DevelopmentFactor
              XYPairs: X=[3, 4, 5, 5.7, 6]; Y=[1, 1, 1, 1, 1.2]
              Memo
                Exntiction coefficient increases at stem extension as leaves become more prostrate
              VariableReference XValue: VariableName=[Phenology].Stage
          Constant StructuralFraction: FixedValue=0.5
          Constant DMConversionEfficiency: FixedValue=1
          Constant CarbonConcentration: FixedValue=0.4
          Constant WidthFunction: FixedValue=0
          VariableReference DepthFunction: VariableName=[Leaf].Height
          NutrientPoolFunctions DMDemandPriorityFactors: same as Simulation.Field.Wheat.Grain.DMDemandPriorityFactors
          NutrientPoolFunctions NDemandPriorityFactors: same as Simulation.Field.Wheat.Grain.DMDemandPriorityFactors
        GenericOrgan Spike: IsAboveGround=true
          Constant NReallocationFactor: FixedValue=0
          Constant RemobilisationCost: FixedValue=0
          PhaseLookup NRetranslocationFactor
            PhaseLookupValue EarlyGrowth: Start=Emergence; End=StartGrainFill
              Constant ValueDuringEarlyGrowth: FixedValue=0
            PhaseLookupValue ReproductiveGrowth: Start=StartGrainFill; End=EndGrainFill
              Constant ValueDuringGrainFill: FixedValue=0.5
          LinearInterpolationFunction MaximumNConc
            XYPairs: X=[3, 4, 5, 5.5, 6.5, 7, 8]; Y=[0.01, 0.01, 0.01, 0.01, 0.025, 0.025, 0.025]
            VariableReference XValue: VariableName=[Phenology].Stage
          Constant MinimumNConc: FixedValue=0.004
          BiomassRemoval BiomassRemovalDefaults
            OrganBiomassRemovalType Harvest: FractionLiveToRemove=0.5; FractionDeadToRemove=0; FractionLiveToResidue=0.1; FractionDeadToResidue=0
            OrganBiomassRemovalType Cut: FractionLiveToRemove=0.8; FractionDeadToRemove=0; FractionLiveToResidue=0; FractionDeadToResidue=0
            OrganBiomassRemovalType Prune: FractionLiveToRemove=0; FractionDeadToRemove=0; FractionLiveToResidue=0.6; FractionDeadToResidue=0
            OrganBiomassRemovalType Graze: FractionLiveToRemove=0.6; FractionDeadToRemove=0; FractionLiveToResidue=0.2; FractionDeadToResidue=0
            OrganBiomassRemovalType Thin: FractionLiveToRemove=0; FractionDeadToRemove=0; FractionLiveToResidue=0.05; FractionDeadToResidue=0
          PhaseLookupValue NitrogenDemandSwitch: Start=Emergence; End=StartGrainFill
            Constant: FixedValue=1
          PhaseLookup DMRetranslocationFactor
            PhaseLookupValue VegetativeGrowth: Start=Emergence; End=StartGrainFill
              Constant DMRetranslocationFactor: FixedValue=0
            PhaseLookupValue ReproductiveGrowth: Start=StartGrainFill; End=EndGrainFill
              Constant DMRetranslocationFactor: FixedValue=0.5
          Constant DetachmentRateFunction: FixedValue=0; Units=/d
          Constant MaintenanceRespirationFunction: FixedValue=0; Units=0-1
          Constant DMConversionEfficiency: FixedValue=1; Units=0-1
          VariableReference HeadNumber: VariableName=[Structure].TotalStemPopn
          Constant DMReallocationFactor: FixedValue=0
          AddFunction CriticalNConc
            VariableReference MinimumNConc: VariableName=[Spike].MinimumNConc
            MultiplyFunction MetabolicNconc
              SubtractFunction NonStructuralN
                VariableReference MaximumNConc: VariableName=[Spike].MaximumNConc
                VariableReference MinimumNConc: VariableName=[Spike].MinimumNConc
              Constant Proportion: FixedValue=0.8
          LinearInterpolationFunction SenescenceRate
            XYPairs: X=[3, 4, 5, 6, 7, 8]; Y=[0.07, 0.04, 0.04, 0.015, 0.012, 0.012]
            VariableReference XValue: VariableName=[Phenology].Stage
          Constant CarbonConcentration: FixedValue=0.4
          NutrientDemandFunctions DMDemands
            MultiplyFunction Structural
              PartitionFractionDemandFunction DMDemandFunction
                LinearInterpolationFunction PartitionFraction
                  XYPairs: X=[5, 6, 6.01, 8, 9]; Y=[0, 0.01, 0.9, 0.9, 0]
                  VariableReference XValue: VariableName=[Phenology].Stage
              PhaseLookup StructuralFraction
                PhaseLookupValue VegetativeGrowth: Start=Emergence; End=StartGrainFill
                  Constant StructuralFractionEG: FixedValue=0.3
                PhaseLookupValue ReproductiveGrowth: Start=StartGrainFill; End=EndGrainFill
                  Constant StructuralFractionGF: FixedValue=0
            Constant Metabolic: FixedValue=0
            StorageDMDemandFunction Storage
              SubtractFunction StorageFraction
                Constant One: FixedValue=1
                VariableReference StructuralFraction: VariableName=[Spike].DMDemands.Structural.StructuralFraction
            Constant QStructuralPriority: FixedValue=1
            Constant QMetabolicPriority: FixedValue=1
            Constant QStoragePriority: FixedValue=1
          NutrientDemandFunctions NDemands
            MultiplyFunction Structural
              VariableReference MinNconc: VariableName=[Spike].minimumNconc
              VariableReference PotentialDMAllocation: VariableName=[Spike].potentialDMAllocation.Structural
            MultiplyFunction Metabolic
              SubtractFunction MetabolicNconc
                VariableReference CritNconc: VariableName=[Spike].criticalNConc
                VariableReference MinNconc: VariableName=[Spike].minimumNconc
              VariableReference PotentialDMAllocation: VariableName=[Spike].potentialDMAllocation.Structural
            StorageNDemandFunction Storage
              VariableReference NitrogenDemandSwitch: VariableName=[Spike].nitrogenDemandSwitch
              VariableReference MaxNconc: VariableName=[Spike].maximumNconc
            Constant QStructuralPriority: FixedValue=1
            Constant QMetabolicPriority: FixedValue=1
            Constant QStoragePriority: FixedValue=1
          RetranslocateNonStructural RetranslocateNitrogen
          NutrientPoolFunctions InitialWt
            Constant Structural: FixedValue=0; Units=g/m^2
            Constant Metabolic: FixedValue=0
            Constant Storage: FixedValue=0
          Constant Photosynthesis: FixedValue=0
          VariableReference initialNConcFunction: VariableName=[Spike].MinimumNConc
        GenericOrgan Stem: IsAboveGround=true
          LinearInterpolationFunction SenescenceRate
            XYPairs: X=[3, 4, 5, 6, 7, 8, 9, 10, 11]; Y=[0, 0, 0, 0, 0, 0, 0, 0.2, 0.5]
            VariableReference XValue: VariableName=[Phenology].Stage
          Constant RemobilisationCost: FixedValue=0
          LinearInterpolationFunction MaximumNConc: same as Simulation.Field.Wheat.Spike.SenescenceRate
          Constant MinimumNConc: FixedValue=0.0025
          PhaseLookupValue NitrogenDemandSwitch: Start=Emergence; End=StartGrainFill
            Constant: FixedValue=1
          Constant NReallocationFactor: FixedValue=0
          PhaseLookup NRetranslocationFactor
            PhaseLookupValue VegetativeGrowth: Start=Sowing; End=Flowering
              Constant Fraction: FixedValue=0
            PhaseLookupValue ReproductiveGrowth: Start=Flowering; End=HarvestRipe
              Constant Fraction: FixedValue=0.5
          PhaseLookup DMRetranslocationFactor: same as Simulation.Field.Wheat.Spike.DMRetranslocationFactor
          BiomassRemoval BiomassRemovalDefaults: same as Simulation.Field.Wheat.Spike.BiomassRemovalDefaults
          DivideFunction PercentWSC
            VariableReference WSC: VariableName=[Stem].Live.StorageWt
            VariableReference StemWt: VariableName=[Stem].Live.Wt
          Constant DetachmentRateFunction: FixedValue=0; Units=/d
          Constant MaintenanceRespirationFunction: FixedValue=0; Units=0-1
          Constant DMConversionEfficiency: FixedValue=1; Units=0-1
          Constant DMReallocationFactor: FixedValue=0
          AddFunction CriticalNConc
            VariableReference MinimumNConc: VariableName=[Stem].MinimumNConc
            MultiplyFunction MetabolicNconc
              SubtractFunction NonStructuralN
                VariableReference MaximumNConc: VariableName=[Stem].MaximumNConc
                VariableReference MinimumNConc: VariableName=[Stem].MinimumNConc
              Constant Proportion: FixedValue=0.5
          Constant CarbonConcentration: FixedValue=0.4
          NutrientDemandFunctions DMDemands
            MultiplyFunction Structural
              PartitionFractionDemandFunction DMDemandFunction
                PhaseLookup PartitionFraction
                  PhaseLookupValue PreStemElongation: Start=Emergence; End=TerminalSpikelet
                    Constant StemFraction: FixedValue=0.2
                  PhaseLookupValue StemElongation: Start=TerminalSpikelet; End=StartGrainFill
                    Constant StemFraction: FixedValue=0.7; Units=0
                  PhaseLookupValue EarEmergence: Start=StartGrainFill; End=HarvestRipe
                    Constant StemFraction: FixedValue=0
              PhaseLookup StructuralFraction
                PhaseLookupValue VegetativeGrowth: Start=Sowing; End=StartGrainFill
                  Constant Fraction: FixedValue=0.3
                PhaseLookupValue ReproductiveGrowth: Start=StartGrainFill; End=HarvestRipe
                  Constant Fraction: FixedValue=0.01
            Constant Metabolic: FixedValue=0
            StorageDMDemandFunction Storage
              SubtractFunction StorageFraction
                Constant One: FixedValue=1
                VariableReference StructuralFraction: VariableName=[Stem].DMDemands.Structural.StructuralFraction
            Constant QStructuralPriority: FixedValue=1
            Constant QMetabolicPriority: FixedValue=1
            Constant QStoragePriority: FixedValue=1
          NutrientDemandFunctions NDemands
            MultiplyFunction Structural
              VariableReference MinNconc: VariableName=[Stem].minimumNconc
              VariableReference PotentialDMAllocation: VariableName=[Stem].potentialDMAllocation.Structural
            MultiplyFunction Metabolic
              SubtractFunction MetabolicNconc
                VariableReference CritNconc: VariableName=[Stem].criticalNConc
                VariableReference MinNconc: VariableName=[Stem].minimumNconc
              VariableReference PotentialDMAllocation: VariableName=[Stem].potentialDMAllocation.Structural
            StorageNDemandFunction Storage
              VariableReference NitrogenDemandSwitch: VariableName=[Stem].nitrogenDemandSwitch
              VariableReference MaxNconc: VariableName=[Stem].maximumNconc
            Constant QStructuralPriority: FixedValue=1
            Constant QMetabolicPriority: FixedValue=1
            Constant QStoragePriority: FixedValue=1
          RetranslocateNonStructural RetranslocateNitrogen
          NutrientPoolFunctions InitialWt: same as Simulation.Field.Wheat.Spike.InitialWt
          Constant Photosynthesis: FixedValue=0
          VariableReference initialNConcFunction: VariableName=[Stem].MinimumNConc
        CompositeBiomass AboveGround: OrganNames=[Leaf, Stem, Spike, Grain]; IncludeLive=true; IncludeDead=true
        CompositeBiomass AboveGroundLive: OrganNames=[Leaf, Stem, Spike, Grain]; IncludeLive=true; IncludeDead=false
        CompositeBiomass AboveGroundDead: OrganNames=[Leaf, Stem, Spike, Grain]; IncludeLive=false; IncludeDead=true
        CompositeBiomass BelowGround: OrganNames=[Root]; IncludeLive=true; IncludeDead=true
        CompositeBiomass Total: OrganNames=[Leaf, Stem, Root, Spike, Grain]; IncludeLive=true; IncludeDead=true
        CompositeBiomass TotalLive: OrganNames=[Leaf, Stem, Root, Spike, Grain]; IncludeLive=true; IncludeDead=false
        CompositeBiomass TotalDead: OrganNames=[Leaf, Stem, Root, Spike, Grain]; IncludeLive=false; IncludeDead=true
        CompositeBiomass Ear: OrganNames=[Spike, Grain]; IncludeLive=true; IncludeDead=true
          Memo
            The Ear composite biomass object includes the Live and dead pools of all organs within the Ear to allow output for total dry matter and Nutrient contents, including total structural, non-structural and metabolic pools.
        CompositeBiomass StemPlusSpike: OrganNames=[Stem, Spike]; IncludeLive=true; IncludeDead=true
        Folder Cultivars
          Cultivar Collins
            Command:
              [Phenology].Phyllochron.BasePhyllochron.FixedValue = 107.602580952482
              [Phenology].PhyllochronPpSensitivity.FixedValue = 0.23032920462638
              [Phenology].CAMP.FLNparams.MinLN = 6.2
              [Phenology].CAMP.FLNparams.PpLN = 1.7000000000000002
              [Phenology].CAMP.FLNparams.VrnLN = 4.1
              [Phenology].CAMP.FLNparams.VxPLN = -2.5999999999999996
              [Phenology].CAMP.EnvData.VrnTreatTemp = 6
              [Phenology].CAMP.EnvData.VrnTreatDuration = 60
              [Phenology].HeadEmergenceLongDayBase.FixedValue = 172
              [Phenology].HeadEmergencePpSensitivity.FixedValue = 0.5
          Folder New Zealand
            Cultivar Amarok
              Command:
                [Phenology].HeadEmergencePpSensitivity.FixedValue = 3.0
                [Phenology].Phyllochron.BasePhyllochron.FixedValue = 100.0
                [Phenology].PhyllochronPpSensitivity.FixedValue = 0.6
                [Phenology].CAMP.FLNparams.MinLN = 7.9
                [Phenology].CAMP.FLNparams.PpLN = 3.0
                [Phenology].CAMP.FLNparams.VrnLN = 5.499999999999998
                [Phenology].CAMP.FLNparams.VxPLN = 3.900000000000002
                [Phenology].HeadEmergenceLongDayBase.FixedValue = 122
                [Phenology].CAMP.EnvData.VrnTreatTemp = 6
                [Phenology].CAMP.EnvData.VrnTreatDuration = 60
            Cultivar BattenWinter
              Command:
                [Phenology].HeadEmergencePpSensitivity.FixedValue = 4.5
                [Phenology].Phyllochron.BasePhyllochron.FixedValue = 100.0
                [Leaf].ExtinctionCoeff.VegetativePhase.FixedValue = 0.7
                [Grain].NumberFunction.GrainNumber.GrainsPerGramOfStem.FixedValue = 22
                [Phenology].PhyllochronPpSensitivity.FixedValue = 0.6
                [Phenology].CAMP.FLNparams.MinLN = 8.5
                [Phenology].CAMP.FLNparams.PpLN = 7.0
                [Phenology].CAMP.FLNparams.VrnLN = 6.199999999999999
                [Phenology].CAMP.FLNparams.VxPLN = 4.0
                [Phenology].HeadEmergenceLongDayBase.FixedValue = 120
                [Phenology].CAMP.EnvData.VrnTreatTemp = 6
                [Phenology].CAMP.EnvData.VrnTreatDuration = 60
            Cultivar BattenSpring
              Command:
                [Phenology].HeadEmergencePpSensitivity.FixedValue = 1.5
                [Phenology].Phyllochron.BasePhyllochron.FixedValue = 100.0
                [Leaf].ExtinctionCoeff.VegetativePhase.FixedValue = 0.7
                [Grain].NumberFunction.GrainNumber.GrainsPerGramOfStem.FixedValue = 22
                [Phenology].PhyllochronPpSensitivity.FixedValue = 0.6
                [Phenology].CAMP.FLNparams.MinLN = 8.5
                [Phenology].CAMP.FLNparams.PpLN = 7.0
                [Phenology].CAMP.FLNparams.VrnLN = 1.8999999999999986
                [Phenology].CAMP.FLNparams.VxPLN = -1.6999999999999993
                [Phenology].HeadEmergenceLongDayBase.FixedValue = 120
                [Phenology].CAMP.EnvData.VrnTreatTemp = 6
                [Phenology].CAMP.EnvData.VrnTreatDuration = 60
            Cultivar Claire
              Command:
                [Phenology].HeadEmergencePpSensitivity.FixedValue = 0.0
                [Phenology].Phyllochron.BasePhyllochron.FixedValue = 100
                [Phenology].CAMP.FLNparams.MinLN = 9.3
                [Phenology].CAMP.FLNparams.PpLN = 5.0
                [Phenology].CAMP.FLNparams.VrnLN = 4.699999999999999
                [Phenology].CAMP.FLNparams.VxPLN = 3.0
                [Phenology].HeadEmergenceLongDayBase.FixedValue = 210
                [Phenology].CAMP.EnvData.VrnTreatTemp = 6
                [Phenology].CAMP.EnvData.VrnTreatDuration = 60
            Cultivar Conquest
              Command:
                [Phenology].Phyllochron.BasePhyllochron.FixedValue = 100
                [Phenology].CAMP.FLNparams.MinLN = 7.5
                [Phenology].CAMP.FLNparams.PpLN = 2.5
                [Phenology].CAMP.FLNparams.VrnLN = 0.0
                [Phenology].CAMP.FLNparams.VxPLN = 0.0
                [Phenology].HeadEmergenceLongDayBase.FixedValue = 100
                [Phenology].HeadEmergencePpSensitivity.FixedValue = 1.0
                [Phenology].CAMP.EnvData.VrnTreatTemp = 6
                [Phenology].CAMP.EnvData.VrnTreatDuration = 60
            Cultivar CRWT153
              Command:
                [Phenology].Phyllochron.BasePhyllochron.FixedValue = 100.0
                [Phenology].PhyllochronPpSensitivity.FixedValue = 0.6
                [Phenology].CAMP.FLNparams.MinLN = 14.27272727272727
                [Phenology].CAMP.FLNparams.PpLN = -0.028282828282829797
                [Phenology].CAMP.FLNparams.VrnLN = 2.6000000000000014
                [Phenology].CAMP.FLNparams.VxPLN = -1.2477272727272712
                [Phenology].HeadEmergenceLongDayBase.FixedValue = 200
                [Phenology].HeadEmergencePpSensitivity.FixedValue = 2.3
                [Phenology].CAMP.EnvData.VrnTreatTemp = 6
                [Phenology].CAMP.EnvData.VrnTreatDuration = 60
            Cultivar Discovery
              Command:
                [Phenology].Phyllochron.BasePhyllochron.FixedValue = 80
                [Leaf].CohortParameters.MaxArea.AreaLargestLeaves.FixedValue = 1600
                [Grain].MaximumPotentialGrainSize.MaximumSize.FixedValue = 0.051
                [Grain].NumberFunction.GrainNumber.GrainsPerGramOfStem.FixedValue = 35
                [Leaf].ExtinctionCoeff.VegetativePhase.FixedValue = 0.5
                [Structure].BranchingRate.PotentialBranchingRate.Vegetative.PotentialBranchingRate.XYPairs.Y = 0,0,0,0,4,7,12,20
                [Grain].MaximumNConc.FixedValue = 0.025
                [Grain].MaxNConcDailyGrowth.FixedValue = 0.025
                [Leaf].ExtinctionCoeff.DevelopmentFactor.XYPairs.Y = 1,1,1,1,1.4
                [Leaf].CohortParameters.MinimumNConc.XYPairs.Y = 0.01,0.008, 0.008,0.008, 0.008, 0.008
                [Stem].MinimumNConc.FixedValue = 0.006
                [Spike].DMRetranslocationFactor.ReproductiveGrowth.DMRetranslocationFactor.FixedValue = 0.05
                [Phenology].CAMP.FLNparams.MinLN = 9.0
                [Phenology].CAMP.FLNparams.PpLN = 0.0
                [Phenology].CAMP.FLNparams.VrnLN = 0.0
                [Phenology].CAMP.FLNparams.VxPLN = 0.0
                [Phenology].HeadEmergenceLongDayBase.FixedValue = 100
                [Phenology].HeadEmergencePpSensitivity.FixedValue = 1.0
                [Phenology].CAMP.EnvData.VrnTreatTemp = 6
                [Phenology].CAMP.EnvData.VrnTreatDuration = 60
              Memo
                This is a spring wheat with a high grain number and later tillering
            Cultivar Exceed
              Command:
                [Phenology].CAMP.FLNparams.MinLN = 9
                [Phenology].CAMP.FLNparams.PpLN = 3.0
                [Phenology].CAMP.FLNparams.VrnLN = 7
                [Phenology].CAMP.FLNparams.VxPLN = 0.0
            Cultivar Option
              Command:
                [Phenology].CAMP.FLNparams.MinLN = 9
                [Phenology].CAMP.FLNparams.PpLN = 3.0
                [Phenology].CAMP.FLNparams.VrnLN = 7
                [Phenology].CAMP.FLNparams.VxPLN = 0.0
            Cultivar Otane
              Command:
                [Phenology].HeadEmergencePpSensitivity.FixedValue = 7.6
                [Phenology].Phyllochron.BasePhyllochron.FixedValue = 100.0
                [Phenology].PhyllochronPpSensitivity.FixedValue = 0.6
                [Phenology].CAMP.FLNparams.MinLN = 6.8
                [Phenology].CAMP.FLNparams.PpLN = 3.8
                [Phenology].CAMP.FLNparams.VrnLN = 0.0
                [Phenology].CAMP.FLNparams.VxPLN = 0.0
                [Phenology].HeadEmergenceLongDayBase.FixedValue = 90
                [Phenology].CAMP.EnvData.VrnTreatTemp = 6
                [Phenology].CAMP.EnvData.VrnTreatDuration = 60
            Cultivar Regency
              Command:
                [Phenology].CAMP.FLNparams.MinLN = 9
                [Phenology].CAMP.FLNparams.PpLN = 3.0
                [Phenology].CAMP.FLNparams.VrnLN = 7
                [Phenology].CAMP.FLNparams.VxPLN = 0.0
            Cultivar Robigus
              Command:
                [Phenology].CAMP.FLNparams.MinLN = 9
                [Phenology].CAMP.FLNparams.PpLN = 3.0
                [Phenology].CAMP.FLNparams.VrnLN = 7
                [Phenology].CAMP.FLNparams.VxPLN = 0.0
            Cultivar Rongotea
              Command:
                [Phenology].HeadEmergencePpSensitivity.FixedValue = 2.3
                [Phenology].Phyllochron.BasePhyllochron.FixedValue = 100
                [Phenology].CAMP.FLNparams.MinLN = 7.5
                [Phenology].CAMP.FLNparams.PpLN = 14.5
                [Phenology].CAMP.FLNparams.VrnLN = 6.0
                [Phenology].CAMP.FLNparams.VxPLN = -6.0
                [Phenology].HeadEmergenceLongDayBase.FixedValue = 200
                [Phenology].CAMP.EnvData.VrnTreatTemp = 6
                [Phenology].CAMP.EnvData.VrnTreatDuration = 60
            Cultivar Sage
              Command:
                [Phenology].CAMP.FLNparams.MinLN = 9
                [Phenology].CAMP.FLNparams.PpLN = 3.0
                [Phenology].CAMP.FLNparams.VrnLN = 7
                [Phenology].CAMP.FLNparams.VxPLN = 0.0
            Cultivar Saracen
              Command:
                [Phenology].Phyllochron.BasePhyllochron.FixedValue = 100.0
                [Phenology].PhyllochronPpSensitivity.FixedValue = 0.6
                [Phenology].CAMP.FLNparams.MinLN = 7.545454545454546
                [Phenology].CAMP.FLNparams.PpLN = 2.710955710955715
                [Phenology].CAMP.FLNparams.VrnLN = 0.8769230769230685
                [Phenology].CAMP.FLNparams.VxPLN = 2.2919080919080956
                [Phenology].HeadEmergenceLongDayBase.FixedValue = 200
                [Phenology].HeadEmergencePpSensitivity.FixedValue = 2.3
                [Phenology].CAMP.EnvData.VrnTreatTemp = 6
                [Phenology].CAMP.EnvData.VrnTreatDuration = 60
            Cultivar Solstice
              Command:
                [Phenology].CAMP.FLNparams.MinLN = 9
                [Phenology].CAMP.FLNparams.PpLN = 3.0
                [Phenology].CAMP.FLNparams.VrnLN = 7
                [Phenology].CAMP.FLNparams.VxPLN = 0.0
            Cultivar Tribute
              Command:
                [Phenology].CAMP.FLNparams.MinLN = 9
                [Phenology].CAMP.FLNparams.PpLN = 3.0
                [Phenology].CAMP.FLNparams.VrnLN = 7
                [Phenology].CAMP.FLNparams.VxPLN = 0.0
            Cultivar Wakanui
              Command:
                [Phenology].HeadEmergenceLongDayBase.FixedValue = 90
                [Phenology].Phyllochron.BasePhyllochron.FixedValue = 105.0
                [Leaf].ExtinctionCoeff.VegetativePhase.FixedValue = 0.75
                [Grain].NumberFunction.GrainNumber.GrainsPerGramOfStem.FixedValue = 22
                [Grain].MaximumPotentialGrainSize.MaximumSize.FixedValue = 0.045
                [Leaf].CohortParameters.MaxArea.AreaLargestLeaves.FixedValue = 3000
                [Phenology].PhyllochronPpSensitivity.FixedValue = 0.33
                [Phenology].CAMP.FLNparams.MinLN = 11.0
                [Phenology].CAMP.FLNparams.PpLN = 8.100000000000001
                [Phenology].CAMP.FLNparams.VrnLN = 8.899999999999999
                [Phenology].CAMP.FLNparams.VxPLN = -4.399999999999999
                [Phenology].HeadEmergencePpSensitivity.FixedValue = 7.9
                [Phenology].CAMP.EnvData.VrnTreatTemp = 6
                [Phenology].CAMP.EnvData.VrnTreatDuration = 60
          Folder Australia
            Cultivar Axe
              Command:
                [Phenology].HeadEmergencePpSensitivity.FixedValue = 0.0
                [Phenology].Phyllochron.BasePhyllochron.FixedValue = 92.9812317822162
                [Phenology].PhyllochronPpSensitivity.FixedValue = 0.268590208069814
                [Phenology].CAMP.FLNparams.MinLN = 7.0
                [Phenology].CAMP.FLNparams.PpLN = 0.5
                [Phenology].CAMP.FLNparams.VrnLN = 1.0
                [Phenology].CAMP.FLNparams.VxPLN = -1.0
                [Phenology].CAMP.EnvData.VrnTreatTemp = 5.8
                [Phenology].CAMP.EnvData.VrnTreatDuration = 60
                [Phenology].HeadEmergenceLongDayBase.FixedValue = 210
            Cultivar Bolac
              Command:
                [Phenology].Phyllochron.BasePhyllochron.FixedValue = 99.3767047504637
                [Phenology].PhyllochronPpSensitivity.FixedValue = 0.204801292585874
                [Phenology].CAMP.FLNparams.MinLN = 7.0
                [Phenology].CAMP.FLNparams.PpLN = 4.0
                [Phenology].CAMP.FLNparams.VrnLN = 1.5
                [Phenology].CAMP.FLNparams.VxPLN = -0.5
                [Phenology].CAMP.EnvData.VrnTreatTemp = 5.8
                [Phenology].CAMP.EnvData.VrnTreatDuration = 60
                [Phenology].HeadEmergenceLongDayBase.FixedValue = 190
                [Phenology].HeadEmergencePpSensitivity.FixedValue = 0.0
            Cultivar Cunningham
              Command:
                [Phenology].Phyllochron.BasePhyllochron.FixedValue = 100
                [Phenology].CAMP.FLNparams.MinLN = 6
                [Phenology].CAMP.FLNparams.PpLN = 4.0
                [Phenology].CAMP.FLNparams.VrnLN = 0
                [Phenology].CAMP.FLNparams.VxPLN = 0.0
            Cultivar Derrimut
              Command:
                [Phenology].Phyllochron.BasePhyllochron.FixedValue = 94.7552823110091
                [Phenology].PhyllochronPpSensitivity.FixedValue = 0.263180943521024
                [Phenology].CAMP.FLNparams.MinLN = 7.0
                [Phenology].CAMP.FLNparams.PpLN = 2.5
                [Phenology].CAMP.FLNparams.VrnLN = 2.0
                [Phenology].CAMP.FLNparams.VxPLN = -1.5
                [Phenology].CAMP.EnvData.VrnTreatTemp = 5.8
                [Phenology].CAMP.EnvData.VrnTreatDuration = 60
                [Phenology].HeadEmergenceLongDayBase.FixedValue = 190
                [Phenology].HeadEmergencePpSensitivity.FixedValue = 0.0
            Cultivar Gregory
              Command:
                [Phenology].Phyllochron.BasePhyllochron.FixedValue = 96.2227321902995
                [Phenology].PhyllochronPpSensitivity.FixedValue = 0.199981872553676
                [Phenology].CAMP.FLNparams.MinLN = 7.8
                [Phenology].CAMP.FLNparams.PpLN = 2.6000000000000005
                [Phenology].CAMP.FLNparams.VrnLN = 2.5
                [Phenology].CAMP.FLNparams.VxPLN = -1.1000000000000005
                [Phenology].CAMP.EnvData.VrnTreatTemp = 6
                [Phenology].CAMP.EnvData.VrnTreatDuration = 60
                [Phenology].HeadEmergenceLongDayBase.FixedValue = 84
                [Phenology].HeadEmergencePpSensitivity.FixedValue = 1.6
              Alias Suneca
            Cultivar Gamenya
              Command:
                [Phenology].Phyllochron.BasePhyllochron.FixedValue = 100
                [Phenology].HeadEmergencePpSensitivity.FixedValue = 0.0
                [Phenology].CAMP.FLNparams.MinLN = 9.5
                [Phenology].CAMP.FLNparams.PpLN = 4.6
                [Phenology].CAMP.FLNparams.VrnLN = -1.799999999999999
                [Phenology].CAMP.FLNparams.VxPLN = 2.9999999999999982
                [Phenology].HeadEmergenceLongDayBase.FixedValue = 195
                [Phenology].CAMP.EnvData.VrnTreatTemp = 6
                [Phenology].CAMP.EnvData.VrnTreatDuration = 60
            Cultivar Gauntlet
              Command:
                [Phenology].Phyllochron.BasePhyllochron.FixedValue = 91.4777217640106
                [Phenology].PhyllochronPpSensitivity.FixedValue = 0.28135751778138
                [Phenology].CAMP.FLNparams.MinLN = 7.5
                [Phenology].CAMP.FLNparams.PpLN = 2.0
                [Phenology].CAMP.FLNparams.VrnLN = 4.0
                [Phenology].CAMP.FLNparams.VxPLN = -3.0
                [Phenology].CAMP.EnvData.VrnTreatTemp = 5.8
                [Phenology].CAMP.EnvData.VrnTreatDuration = 60
                [Phenology].HeadEmergenceLongDayBase.FixedValue = 210
                [Phenology].HeadEmergencePpSensitivity.FixedValue = 0.0
            Cultivar Gladius
              Command:
                [Phenology].Phyllochron.BasePhyllochron.FixedValue = 100
                [Phenology].CAMP.FLNparams.MinLN = 6
                [Phenology].CAMP.FLNparams.PpLN = 5.0
                [Phenology].CAMP.FLNparams.VrnLN = 0
                [Phenology].CAMP.FLNparams.VxPLN = 0.0
            Cultivar Gutha
              Command:
                [Phenology].Phyllochron.BasePhyllochron.FixedValue = 100
                [Grain].MaximumPotentialGrainSize.MaximumSize.FixedValue = 0.041
                [Grain].NumberFunction.GrainNumber.GrainsPerGramOfStem.FixedValue = 17
                [Phenology].CAMP.FLNparams.MinLN = 6
                [Phenology].CAMP.FLNparams.PpLN = 5.0
                [Phenology].CAMP.FLNparams.VrnLN = 0
                [Phenology].CAMP.FLNparams.VxPLN = 0.0
            Cultivar H45
              Command:
                [Phenology].Phyllochron.BasePhyllochron.FixedValue = 85.6989214218668
                [Grain].NumberFunction.GrainNumber.GrainsPerGramOfStem.FixedValue = 20
                [Phenology].PhyllochronPpSensitivity.FixedValue = 0.349562436956343
                [Phenology].CAMP.FLNparams.MinLN = 9.5
                [Phenology].CAMP.FLNparams.PpLN = 4.6
                [Phenology].CAMP.FLNparams.VrnLN = -1.799999999999999
                [Phenology].CAMP.FLNparams.VxPLN = 2.9999999999999982
                [Phenology].CAMP.EnvData.VrnTreatTemp = 6
                [Phenology].CAMP.EnvData.VrnTreatDuration = 60
                [Phenology].HeadEmergenceLongDayBase.FixedValue = 195
                [Phenology].HeadEmergencePpSensitivity.FixedValue = 0.0
            Cultivar H46
              Command:
                [Phenology].Phyllochron.BasePhyllochron.FixedValue = 100
                [Phenology].CAMP.FLNparams.MinLN = 8
                [Phenology].CAMP.FLNparams.PpLN = 4.0
                [Phenology].CAMP.FLNparams.VrnLN = 0
                [Phenology].CAMP.FLNparams.VxPLN = 0.0
            Cultivar Hartog
              Command:
                [Phenology].Phyllochron.BasePhyllochron.FixedValue = 107.48
                [Grain].MaximumPotentialGrainSize.MaximumSize.FixedValue = 0.041
                [Phenology].PhyllochronPpSensitivity.FixedValue = 0.247
                [Phenology].CAMP.FLNparams.MinLN = 6.5
                [Phenology].CAMP.FLNparams.PpLN = 3.5
                [Phenology].CAMP.FLNparams.VrnLN = 2.5
                [Phenology].CAMP.FLNparams.VxPLN = 0.0
                [Phenology].HeadEmergenceLongDayBase.FixedValue = 150
                [Phenology].HeadEmergencePpSensitivity.FixedValue = 0.0
                [Phenology].CAMP.EnvData.VrnTreatTemp = 6
                [Phenology].CAMP.EnvData.VrnTreatDuration = 60
            Cultivar Wills
              Command:
                [Phenology].HeadEmergenceLongDayBase.FixedValue = 190
                [Phenology].Phyllochron.BasePhyllochron.FixedValue = 94.9906866085437
                [Phenology].PhyllochronPpSensitivity.FixedValue = 0.264808096779551
                [Phenology].CAMP.FLNparams.MinLN = 7.0
                [Phenology].CAMP.FLNparams.PpLN = 1.5
                [Phenology].CAMP.FLNparams.VrnLN = 7.0
                [Phenology].CAMP.FLNparams.VxPLN = -3.5
                [Phenology].CAMP.EnvData.VrnTreatTemp = 5.8
                [Phenology].CAMP.EnvData.VrnTreatDuration = 60
                [Phenology].HeadEmergencePpSensitivity.FixedValue = 0.0
            Cultivar Mercury
              Command:
                [Phenology].HeadEmergenceLongDayBase.FixedValue = 200
                [Phenology].Phyllochron.BasePhyllochron.FixedValue = 80
                [Phenology].CAMP.FLNparams.MinLN = 9.0
                [Phenology].CAMP.FLNparams.PpLN = 2.0
                [Phenology].CAMP.FLNparams.VrnLN = 0.0
                [Phenology].CAMP.FLNparams.VxPLN = 0.0
                [Phenology].HeadEmergencePpSensitivity.FixedValue = 0.0
                [Phenology].CAMP.EnvData.VrnTreatTemp = 6
                [Phenology].CAMP.EnvData.VrnTreatDuration = 60
            Cultivar Batavia
              Command:
                [Phenology].Phyllochron.BasePhyllochron.FixedValue = 100
                [Phenology].CAMP.FLNparams.MinLN = 7
                [Phenology].CAMP.FLNparams.PpLN = 5.0
                [Phenology].CAMP.FLNparams.VrnLN = 0
                [Phenology].CAMP.FLNparams.VxPLN = 0.0
            Cultivar Egret
              Command:
                [Phenology].Phyllochron.BasePhyllochron.FixedValue =80
                [Phenology].CAMP.FLNparams.MinLN = 7.6
                [Phenology].CAMP.FLNparams.PpLN = 4.300000000000001
                [Phenology].CAMP.FLNparams.VrnLN = 2.5
                [Phenology].CAMP.FLNparams.VxPLN = -1.5
                [Phenology].HeadEmergenceLongDayBase.FixedValue = 50
                [Phenology].HeadEmergencePpSensitivity.FixedValue = 3.0
                [Phenology].CAMP.EnvData.VrnTreatTemp = 6
                [Phenology].CAMP.EnvData.VrnTreatDuration = 60
            Cultivar Janz
              Command:
                [Phenology].Phyllochron.BasePhyllochron.FixedValue = 91.4460925764448
                [Phenology].PhyllochronPpSensitivity.FixedValue = 0.235020437209909
                [Phenology].CAMP.FLNparams.MinLN = 7.5
                [Phenology].CAMP.FLNparams.PpLN = 3.0
                [Phenology].CAMP.FLNparams.VrnLN = 3.0
                [Phenology].CAMP.FLNparams.VxPLN = -2.5
                [Phenology].CAMP.EnvData.VrnTreatTemp = 5.8
                [Phenology].CAMP.EnvData.VrnTreatDuration = 60
                [Phenology].HeadEmergenceLongDayBase.FixedValue = 170
                [Phenology].HeadEmergencePpSensitivity.FixedValue = 0.0
            Cultivar Kellalac
              Command:
                [Phenology].Phyllochron.BasePhyllochron.FixedValue = 88.1945544451052
                [Phenology].PhyllochronPpSensitivity.FixedValue = 0.350967201537242
                [Phenology].CAMP.FLNparams.MinLN = 7.4
                [Phenology].CAMP.FLNparams.PpLN = 2.299999999999999
                [Phenology].CAMP.FLNparams.VrnLN = 4.700000000000001
                [Phenology].CAMP.FLNparams.VxPLN = -3.700000000000001
                [Phenology].CAMP.EnvData.VrnTreatTemp = 6
                [Phenology].CAMP.EnvData.VrnTreatDuration = 60
                [Phenology].HeadEmergenceLongDayBase.FixedValue = 249
                [Phenology].HeadEmergencePpSensitivity.FixedValue = 1.9
            Cultivar Kennedy
              Command:
                [Phenology].Phyllochron.BasePhyllochron.FixedValue = 100
                [Phenology].CAMP.FLNparams.MinLN = 8
                [Phenology].CAMP.FLNparams.PpLN = 4.0
                [Phenology].CAMP.FLNparams.VrnLN = 0
                [Phenology].CAMP.FLNparams.VxPLN = 0.0
            Cultivar Lang
              Command:
                [Phenology].Phyllochron.BasePhyllochron.FixedValue = 100
                [Phenology].CAMP.FLNparams.MinLN = 6.8
                [Phenology].CAMP.FLNparams.PpLN = 6.500000000000001
                [Phenology].CAMP.FLNparams.VrnLN = -0.5
                [Phenology].CAMP.FLNparams.VxPLN = 0.5
                [Phenology].HeadEmergenceLongDayBase.FixedValue = 50
                [Phenology].HeadEmergencePpSensitivity.FixedValue = 9.0
                [Phenology].CAMP.EnvData.VrnTreatTemp = 6
                [Phenology].CAMP.EnvData.VrnTreatDuration = 60
            Cultivar Livingston
              Command:
                [Phenology].Phyllochron.BasePhyllochron.FixedValue = 100
                [Phenology].CAMP.FLNparams.MinLN = 6.1
                [Phenology].CAMP.FLNparams.PpLN = 3.0
                [Phenology].CAMP.FLNparams.VrnLN = 1.8000000000000007
                [Phenology].CAMP.FLNparams.VxPLN = 4.0
                [Phenology].HeadEmergenceLongDayBase.FixedValue = 108
                [Phenology].HeadEmergencePpSensitivity.FixedValue = 1.3
                [Phenology].CAMP.EnvData.VrnTreatTemp = 6
                [Phenology].CAMP.EnvData.VrnTreatDuration = 60
            Cultivar Lincoln
              Command:
                [Phenology].Phyllochron.BasePhyllochron.FixedValue = 100
                [Phenology].CAMP.FLNparams.MinLN = 6
                [Phenology].CAMP.FLNparams.PpLN = 4.0
                [Phenology].CAMP.FLNparams.VrnLN = 0
                [Phenology].CAMP.FLNparams.VxPLN = 0.0
            Cultivar Mace
              Command:
                [Phenology].Phyllochron.BasePhyllochron.FixedValue = 106.268453805677
                [Phenology].PhyllochronPpSensitivity.FixedValue = 0.137742329295879
                [Phenology].CAMP.FLNparams.MinLN = 5.7
                [Phenology].CAMP.FLNparams.PpLN = 4.2
                [Phenology].CAMP.FLNparams.VrnLN = 1.6999999999999993
                [Phenology].CAMP.FLNparams.VxPLN = 1.9000000000000012
                [Phenology].CAMP.EnvData.VrnTreatTemp = 6
                [Phenology].CAMP.EnvData.VrnTreatDuration = 60
                [Phenology].HeadEmergenceLongDayBase.FixedValue = 74
                [Phenology].HeadEmergencePpSensitivity.FixedValue = 1.7
            Cultivar MacKellar
              Command:
                [Phenology].HeadEmergenceLongDayBase.FixedValue = 167
                [Phenology].Phyllochron.BasePhyllochron.FixedValue = 100
                [Phenology].CAMP.FLNparams.MinLN = 8.0
                [Phenology].CAMP.FLNparams.PpLN = 2.4000000000000004
                [Phenology].CAMP.FLNparams.VrnLN = 3.5
                [Phenology].CAMP.FLNparams.VxPLN = 5.5
                [Phenology].HeadEmergencePpSensitivity.FixedValue = 2.0
                [Phenology].CAMP.EnvData.VrnTreatTemp = 6
                [Phenology].CAMP.EnvData.VrnTreatDuration = 60
            Cultivar Matong
              Command:
                [Phenology].Phyllochron.BasePhyllochron.FixedValue = 100
                [Grain].NumberFunction.GrainNumber.GrainsPerGramOfStem.FixedValue = 22
                [Phenology].CAMP.FLNparams.MinLN = 7
                [Phenology].CAMP.FLNparams.PpLN = 4.0
                [Phenology].CAMP.FLNparams.VrnLN = 1
                [Phenology].CAMP.FLNparams.VxPLN = 0.0
            Cultivar McCubbin
              Command:
                [Phenology].Phyllochron.BasePhyllochron.FixedValue = 90
                [Phenology].CAMP.FLNparams.MinLN = 8.0
                [Phenology].CAMP.FLNparams.PpLN = 10.0
                [Phenology].CAMP.FLNparams.VrnLN = 5.0
                [Phenology].CAMP.FLNparams.VxPLN = -5.0
                [Phenology].HeadEmergenceLongDayBase.FixedValue = 200
                [Phenology].HeadEmergencePpSensitivity.FixedValue = 2.3
                [Phenology].CAMP.EnvData.VrnTreatTemp = 6
                [Phenology].CAMP.EnvData.VrnTreatDuration = 60
            Cultivar Ruby
              Command:
                [Phenology].Phyllochron.BasePhyllochron.FixedValue = 100
                [Phenology].CAMP.FLNparams.MinLN = 8
                [Phenology].CAMP.FLNparams.PpLN = 4.0
                [Phenology].CAMP.FLNparams.VrnLN = 0
                [Phenology].CAMP.FLNparams.VxPLN = 0.0
            Cultivar Spear
              Command:
                [Phenology].Phyllochron.BasePhyllochron.FixedValue = 100
                [Grain].MaximumPotentialGrainSize.MaximumSize.FixedValue = 0.045
                [Phenology].CAMP.FLNparams.MinLN = 6.5
                [Phenology].CAMP.FLNparams.PpLN = 3.5
                [Phenology].CAMP.FLNparams.VrnLN = 2.5
                [Phenology].CAMP.FLNparams.VxPLN = 0.0
                [Phenology].HeadEmergenceLongDayBase.FixedValue = 150
                [Phenology].HeadEmergencePpSensitivity.FixedValue = 0.0
                [Phenology].CAMP.EnvData.VrnTreatTemp = 6
                [Phenology].CAMP.EnvData.VrnTreatDuration = 60
            Cultivar Sunbri
              Command:
                [Phenology].Phyllochron.BasePhyllochron.FixedValue = 91.5032903672171
                [Phenology].PhyllochronPpSensitivity.FixedValue = 0.207593313150283
                [Phenology].CAMP.FLNparams.MinLN = 7.5
                [Phenology].CAMP.FLNparams.PpLN = 4.0
                [Phenology].CAMP.FLNparams.VrnLN = 2.5
                [Phenology].CAMP.FLNparams.VxPLN = -0.5
                [Phenology].CAMP.EnvData.VrnTreatTemp = 5.8
                [Phenology].CAMP.EnvData.VrnTreatDuration = 60
                [Phenology].HeadEmergenceLongDayBase.FixedValue = 190
                [Phenology].HeadEmergencePpSensitivity.FixedValue = 1.0
            Cultivar Sunco
              Command:
                [Phenology].HeadEmergencePpSensitivity.FixedValue = 4
                [Phenology].Phyllochron.BasePhyllochron.FixedValue = 100
                [Phenology].CAMP.FLNparams.MinLN = 6.5
                [Phenology].CAMP.FLNparams.PpLN = 3.5
                [Phenology].CAMP.FLNparams.VrnLN = 0
                [Phenology].CAMP.FLNparams.VxPLN = 0.0
            Cultivar Ventura
              Command:
                [Phenology].Phyllochron.BasePhyllochron.FixedValue = 100
                [Phenology].CAMP.FLNparams.MinLN = 8
                [Phenology].CAMP.FLNparams.PpLN = 4.0
                [Phenology].CAMP.FLNparams.VrnLN = 0
                [Phenology].CAMP.FLNparams.VxPLN = 0.0
            Cultivar Eaglehawk
              Command:
                [Phenology].Phyllochron.BasePhyllochron.FixedValue = 122.758992485634
                [Phenology].PhyllochronPpSensitivity.FixedValue = 0.119042603665788
                [Phenology].CAMP.FLNparams.MinLN = 6.0
                [Phenology].CAMP.FLNparams.PpLN = 3.0
                [Phenology].CAMP.FLNparams.VrnLN = 2.5
                [Phenology].CAMP.FLNparams.VxPLN = 1.5
                [Phenology].CAMP.EnvData.VrnTreatTemp = 5.8
                [Phenology].CAMP.EnvData.VrnTreatDuration = 60
                [Phenology].HeadEmergenceLongDayBase.FixedValue = 270
                [Phenology].HeadEmergencePpSensitivity.FixedValue = 1.0
            Cultivar Wedgetail
              Command:
                [Phenology].Phyllochron.BasePhyllochron.FixedValue = 111.579556421375
                [Phenology].PhyllochronPpSensitivity.FixedValue = 0.217687425020179
                [Phenology].CAMP.FLNparams.MinLN = 7.5
                [Phenology].CAMP.FLNparams.PpLN = 2.5
                [Phenology].CAMP.FLNparams.VrnLN = 7.5
                [Phenology].CAMP.FLNparams.VxPLN = -0.5
                [Phenology].CAMP.EnvData.VrnTreatTemp = 5.8
                [Phenology].CAMP.EnvData.VrnTreatDuration = 60
                [Phenology].HeadEmergenceLongDayBase.FixedValue = 190
                [Phenology].HeadEmergencePpSensitivity.FixedValue = 0.0
            Cultivar Wilgoyne
              Command:
                [Phenology].Phyllochron.BasePhyllochron.FixedValue = 100
                [Grain].NumberFunction.GrainNumber.GrainsPerGramOfStem.FixedValue = 20
                [Grain].MaximumPotentialGrainSize.MaximumSize.FixedValue = 0.045
                [Phenology].CAMP.FLNparams.MinLN = 9.5
                [Phenology].CAMP.FLNparams.PpLN = 4.6
                [Phenology].CAMP.FLNparams.VrnLN = -1.799999999999999
                [Phenology].CAMP.FLNparams.VxPLN = 2.9999999999999982
                [Phenology].HeadEmergenceLongDayBase.FixedValue = 195
                [Phenology].HeadEmergencePpSensitivity.FixedValue = 0.0
                [Phenology].CAMP.EnvData.VrnTreatTemp = 6
                [Phenology].CAMP.EnvData.VrnTreatDuration = 60
            Cultivar Wyalkatchem
              Command:
                [Phenology].Phyllochron.BasePhyllochron.FixedValue = 101.991162889267
                [Phenology].PhyllochronPpSensitivity.FixedValue = 0.203541157884576
                [Phenology].CAMP.FLNparams.MinLN = 7.0
                [Phenology].CAMP.FLNparams.PpLN = 0.5
                [Phenology].CAMP.FLNparams.VrnLN = 5.0
                [Phenology].CAMP.FLNparams.VxPLN = -4.5
                [Phenology].CAMP.EnvData.VrnTreatTemp = 5.8
                [Phenology].CAMP.EnvData.VrnTreatDuration = 60
                [Phenology].HeadEmergenceLongDayBase.FixedValue = 190
                [Phenology].HeadEmergencePpSensitivity.FixedValue = 0.0
            Cultivar Yitpi
              Command:
                [Phenology].HeadEmergenceLongDayBase.FixedValue = 150
                [Phenology].HeadEmergencePpSensitivity.FixedValue = 0.0
                [Phenology].Phyllochron.BasePhyllochron.FixedValue = 107.48018743345
                [Phenology].PhyllochronPpSensitivity.FixedValue = 0.247088996399892
                [Phenology].CAMP.FLNparams.MinLN = 6.5
                [Phenology].CAMP.FLNparams.PpLN = 3.5
                [Phenology].CAMP.FLNparams.VrnLN = 2.5
                [Phenology].CAMP.FLNparams.VxPLN = 0.0
                [Phenology].CAMP.EnvData.VrnTreatTemp = 5.8
                [Phenology].CAMP.EnvData.VrnTreatDuration = 60
            Cultivar Young
              Command:
                [Phenology].Phyllochron.BasePhyllochron.FixedValue = 86.0661362380018
                [Phenology].PhyllochronPpSensitivity.FixedValue = 0.347762945437436
                [Phenology].CAMP.FLNparams.MinLN = 8.0
                [Phenology].CAMP.FLNparams.PpLN = 0.5
                [Phenology].CAMP.FLNparams.VrnLN = 2.0
                [Phenology].CAMP.FLNparams.VxPLN = -1.5
                [Phenology].CAMP.EnvData.VrnTreatTemp = 5.8
                [Phenology].CAMP.EnvData.VrnTreatDuration = 60
                [Phenology].HeadEmergenceLongDayBase.FixedValue = 170
                [Phenology].HeadEmergencePpSensitivity.FixedValue = 0.0
            Cultivar Scepter: same as Simulation.Field.Wheat.Cultivars.Collins
            Cultivar Cutlass
              Command:
                [Phenology].Phyllochron.BasePhyllochron.FixedValue = 95.8008034182983
                [Phenology].PhyllochronPpSensitivity.FixedValue = 0.352406544577556
                [Phenology].CAMP.FLNparams.MinLN = 6.0
                [Phenology].CAMP.FLNparams.PpLN = 4.5
                [Phenology].CAMP.FLNparams.VrnLN = 2.5
                [Phenology].CAMP.FLNparams.VxPLN = 0.0
                [Phenology].CAMP.EnvData.VrnTreatTemp = 5.8
                [Phenology].CAMP.EnvData.VrnTreatDuration = 60
                [Phenology].HeadEmergenceLongDayBase.FixedValue = 230
                [Phenology].HeadEmergencePpSensitivity.FixedValue = 0.5
            Cultivar Longsword
              Command:
                [Phenology].Phyllochron.BasePhyllochron.FixedValue = 100.389906627796
                [Phenology].PhyllochronPpSensitivity.FixedValue = 0.205225247925933
                [Phenology].CAMP.FLNparams.MinLN = 8.0
                [Phenology].CAMP.FLNparams.PpLN = 1.0
                [Phenology].CAMP.FLNparams.VrnLN = 8.0
                [Phenology].CAMP.FLNparams.VxPLN = 0.5
                [Phenology].CAMP.EnvData.VrnTreatTemp = 5.8
                [Phenology].CAMP.EnvData.VrnTreatDuration = 60
                [Phenology].HeadEmergenceLongDayBase.FixedValue = 150
                [Phenology].HeadEmergencePpSensitivity.FixedValue = 0.5
            Cultivar CSIROW007
              Command:
                [Phenology].Phyllochron.BasePhyllochron.FixedValue = 102.785879373288
                [Phenology].PhyllochronPpSensitivity.FixedValue = 0.18434106648197
                [Phenology].CAMP.FLNparams.MinLN = 8.0
                [Phenology].CAMP.FLNparams.PpLN = 0.0
                [Phenology].CAMP.FLNparams.VrnLN = 7.0
                [Phenology].CAMP.FLNparams.VxPLN = -0.5
                [Phenology].CAMP.EnvData.VrnTreatTemp = 5.8
                [Phenology].CAMP.EnvData.VrnTreatDuration = 60
                [Phenology].HeadEmergenceLongDayBase.FixedValue = 170
                [Phenology].HeadEmergencePpSensitivity.FixedValue = 0.5
            Cultivar CSIROW023
              Command:
                [Phenology].Phyllochron.BasePhyllochron.FixedValue = 102.809488116017
                [Phenology].PhyllochronPpSensitivity.FixedValue = 0.218898108718466
                [Phenology].CAMP.FLNparams.MinLN = 8.0
                [Phenology].CAMP.FLNparams.PpLN = 0.5
                [Phenology].CAMP.FLNparams.VrnLN = 4.5
                [Phenology].CAMP.FLNparams.VxPLN = 0.0
                [Phenology].CAMP.EnvData.VrnTreatTemp = 5.8
                [Phenology].CAMP.EnvData.VrnTreatDuration = 60
                [Phenology].HeadEmergenceLongDayBase.FixedValue = 170
                [Phenology].HeadEmergencePpSensitivity.FixedValue = 0.0
            Cultivar CSIROW073
              Command:
                [Phenology].Phyllochron.BasePhyllochron.FixedValue = 95.6693440169749
                [Phenology].PhyllochronPpSensitivity.FixedValue = 0.226791235396558
                [Phenology].CAMP.FLNparams.MinLN = 8.5
                [Phenology].CAMP.FLNparams.PpLN = 0.5
                [Phenology].CAMP.FLNparams.VrnLN = 7.5
                [Phenology].CAMP.FLNparams.VxPLN = -1.0
                [Phenology].CAMP.EnvData.VrnTreatTemp = 5.8
                [Phenology].CAMP.EnvData.VrnTreatDuration = 60
                [Phenology].HeadEmergenceLongDayBase.FixedValue = 170
                [Phenology].HeadEmergencePpSensitivity.FixedValue = 1.0
          Folder Turkey
            Cultivar Konya
              Command:
                [Phenology].Phyllochron.BasePhyllochron.FixedValue = 100
                [Grain].NumberFunction.GrainNumber.GrainsPerGramOfStem.FixedValue = 16
                [Grain].MaximumPotentialGrainSize.MaximumSize.FixedValue = 0.050
                [Grain].MaximumNConc.FixedValue = 0.026
                [Phenology].GrainFilling.Target.FixedValue = 450
                [Stem].DMRetranslocationFactor.ReproductiveGrowth.DMRetranslocationFactor.FixedValue = 0.2
                [Stem].DMDemands.Structural.StructuralFraction.VegetativeGrowth.Fraction.FixedValue = 0.6
                [Leaf].ExtinctionCoeff.VegetativePhase.FixedValue = 0.8
                [Phenology].CAMP.FLNparams.MinLN = 7
                [Phenology].CAMP.FLNparams.PpLN = 4.0
                [Phenology].CAMP.FLNparams.VrnLN = 4
                [Phenology].CAMP.FLNparams.VxPLN = 0.0
          Folder China
            Cultivar Keyu13
              Command:
                [Phenology].Phyllochron.BasePhyllochron.FixedValue = 100
                [Phenology].CAMP.FLNparams.MinLN = 7
                [Phenology].CAMP.FLNparams.PpLN = 3.0
                [Phenology].CAMP.FLNparams.VrnLN = 5
                [Phenology].CAMP.FLNparams.VxPLN = 0.0
          Folder USA
            Cultivar Yecora
              Command:
                [Phenology].Phyllochron.BasePhyllochron.FixedValue = 90
                [Leaf].CohortParameters.MaxArea.AreaLargestLeaves.FixedValue = 4000
                [Phenology].CAMP.FLNparams.MinLN = 8.4
                [Phenology].CAMP.FLNparams.PpLN = 0.40000000000000036
                [Phenology].CAMP.FLNparams.VrnLN = 1.1999999999999993
                [Phenology].CAMP.FLNparams.VxPLN = 0.3000000000000007
                [Phenology].HeadEmergenceLongDayBase.FixedValue = 150
                [Phenology].HeadEmergencePpSensitivity.FixedValue = 0.0
                [Phenology].CAMP.EnvData.VrnTreatTemp = 6
                [Phenology].CAMP.EnvData.VrnTreatDuration = 60
            Cultivar Rex
              Command:
                [Grain].NumberFunction.GrainNumber.GrainsPerGramOfStem.FixedValue = 18
                [Grain].MaximumNConc.FixedValue = 0.02
                [Phenology].CAMP.FLNparams.MinLN = 7
                [Phenology].CAMP.FLNparams.PpLN = 4.0
                [Phenology].CAMP.FLNparams.VrnLN = 6
                [Phenology].CAMP.FLNparams.VxPLN = 0.0
            Cultivar Nugaines
              Command:
                [Grain].NumberFunction.GrainNumber.GrainsPerGramOfStem.FixedValue = 20
                [Grain].MaximumNConc.FixedValue = 0.02
                [Phenology].CAMP.FLNparams.MinLN = 7
                [Phenology].CAMP.FLNparams.PpLN = 4.0
                [Phenology].CAMP.FLNparams.VrnLN = 6
                [Phenology].CAMP.FLNparams.VxPLN = 0.0
            Cultivar Hyslop
              Command:
                [Grain].NumberFunction.GrainNumber.GrainsPerGramOfStem.FixedValue = 22
                [Grain].MaximumNConc.FixedValue = 0.02
                [Phenology].CAMP.FLNparams.MinLN = 7
                [Phenology].CAMP.FLNparams.PpLN = 4.0
                [Phenology].CAMP.FLNparams.VrnLN = 6
                [Phenology].CAMP.FLNparams.VxPLN = 0.0
            Cultivar Stephens
              Command:
                [Grain].NumberFunction.GrainNumber.GrainsPerGramOfStem.FixedValue = 25
                [Grain].MaximumNConc.FixedValue = 0.02
                [Phenology].CAMP.FLNparams.MinLN = 7
                [Phenology].CAMP.FLNparams.PpLN = 4.0
                [Phenology].CAMP.FLNparams.VrnLN = 6
                [Phenology].CAMP.FLNparams.VxPLN = 0.0
          Folder Europe
            Cultivar Dekan
              Command:
                [Phenology].HeadEmergencePpSensitivity.FixedValue = 3
                [Phenology].Phyllochron.BasePhyllochron.FixedValue = 100.0
                [Leaf].ExtinctionCoeff.VegetativePhase.FixedValue = 0.8
                [Phenology].PhyllochronPpSensitivity.FixedValue = 0.6
                [Phenology].CAMP.FLNparams.MinLN = 9
                [Phenology].CAMP.FLNparams.PpLN = 3.0
                [Phenology].CAMP.FLNparams.VrnLN = 7
                [Phenology].CAMP.FLNparams.VxPLN = 0.0
            Cultivar Rosario: same as Simulation.Field.Wheat.Cultivars.Europe.Dekan
            Cultivar Ararat: same as Simulation.Field.Wheat.Cultivars.Europe.Dekan
            Cultivar Tybalt
              Command:
                [Phenology].Phyllochron.BasePhyllochron.FixedValue = 90.0
                [Phenology].PhyllochronPpSensitivity.FixedValue = 0.6
                [Phenology].CAMP.FLNparams.MinLN = 9.0
                [Phenology].CAMP.FLNparams.PpLN = 0.0
                [Phenology].CAMP.FLNparams.VrnLN = 0.0
                [Phenology].CAMP.FLNparams.VxPLN = 0.0
                [Phenology].HeadEmergenceLongDayBase.FixedValue = 145
                [Phenology].HeadEmergencePpSensitivity.FixedValue = 0.0
                [Phenology].CAMP.EnvData.VrnTreatTemp = 6
                [Phenology].CAMP.EnvData.VrnTreatDuration = 60
          Folder Africa
            Cultivar HAR1685
              Command:
                [Phenology].Phyllochron.BasePhyllochron.FixedValue = 100
                [Grain].NumberFunction.GrainNumber.GrainsPerGramOfStem.FixedValue = 17
                [Phenology].GrainFilling.Target.FixedValue = 350
                [Phenology].CAMP.FLNparams.MinLN = 7
                [Phenology].CAMP.FLNparams.PpLN = 3.0
                [Phenology].CAMP.FLNparams.VrnLN = 0
                [Phenology].CAMP.FLNparams.VxPLN = 0.0
          Folder Iran
            Cultivar Gorgan
              Command:
                [Phenology].Phyllochron.BasePhyllochron.FixedValue = 100
                [Phenology].CAMP.FLNparams.MinLN = 7
                [Phenology].CAMP.FLNparams.PpLN = 4.0
                [Phenology].CAMP.FLNparams.VrnLN = 0
                [Phenology].CAMP.FLNparams.VxPLN = 0.0
          Folder Just Added
            Cultivar Adv08_0008
              Command:
                [Phenology].Phyllochron.BasePhyllochron.FixedValue = 107.385378970476
                [Phenology].PhyllochronPpSensitivity.FixedValue = 0.246728222459184
                [Phenology].CAMP.FLNparams.MinLN = 8.0
                [Phenology].CAMP.FLNparams.PpLN = 1.5
                [Phenology].CAMP.FLNparams.VrnLN = 4.5
                [Phenology].CAMP.FLNparams.VxPLN = 1.0
                [Phenology].CAMP.EnvData.VrnTreatTemp = 5.8
                [Phenology].CAMP.EnvData.VrnTreatDuration = 60
                [Phenology].HeadEmergenceLongDayBase.FixedValue = 190
                [Phenology].HeadEmergencePpSensitivity.FixedValue = 0.0
            Cultivar Bennett
              Command:
                [Phenology].Phyllochron.BasePhyllochron.FixedValue = 106.269847259128
                [Phenology].PhyllochronPpSensitivity.FixedValue = 0.221423439420895
                [Phenology].CAMP.FLNparams.MinLN = 8.5
                [Phenology].CAMP.FLNparams.PpLN = 1.0
                [Phenology].CAMP.FLNparams.VrnLN = 6.0
                [Phenology].CAMP.FLNparams.VxPLN = -0.5
                [Phenology].CAMP.EnvData.VrnTreatTemp = 5.8
                [Phenology].CAMP.EnvData.VrnTreatDuration = 60
                [Phenology].HeadEmergenceLongDayBase.FixedValue = 290
                [Phenology].HeadEmergencePpSensitivity.FixedValue = 0.5
            Cultivar Scythe
              Command:
                [Phenology].Phyllochron.BasePhyllochron.FixedValue = 106.486507449716
                [Phenology].PhyllochronPpSensitivity.FixedValue = 0.22806739407445
                [Phenology].CAMP.FLNparams.MinLN = 6.0
                [Phenology].CAMP.FLNparams.PpLN = 3.0
                [Phenology].CAMP.FLNparams.VrnLN = 4.0
                [Phenology].CAMP.FLNparams.VxPLN = 1.5
                [Phenology].CAMP.EnvData.VrnTreatTemp = 5.8
                [Phenology].CAMP.EnvData.VrnTreatDuration = 60
                [Phenology].HeadEmergenceLongDayBase.FixedValue = 170
                [Phenology].HeadEmergencePpSensitivity.FixedValue = 0.0
            Cultivar Beaufort
              Command:
                [Phenology].Phyllochron.BasePhyllochron.FixedValue = 102.321288321408
                [Phenology].PhyllochronPpSensitivity.FixedValue = 0.254667061341894
                [Phenology].CAMP.FLNparams.MinLN = 7.9
                [Phenology].CAMP.FLNparams.PpLN = 1.9000000000000004
                [Phenology].CAMP.FLNparams.VrnLN = 4.399999999999999
                [Phenology].CAMP.FLNparams.VxPLN = 1.5000000000000018
                [Phenology].CAMP.EnvData.VrnTreatTemp = 6
                [Phenology].CAMP.EnvData.VrnTreatDuration = 60
                [Phenology].HeadEmergenceLongDayBase.FixedValue = 50
                [Phenology].HeadEmergencePpSensitivity.FixedValue = 4.3
            Cultivar Braewood
              Command:
                [Phenology].Phyllochron.BasePhyllochron.FixedValue = 92.1177406284002
                [Phenology].PhyllochronPpSensitivity.FixedValue = 0.269041869726177
                [Phenology].CAMP.FLNparams.MinLN = 7.5
                [Phenology].CAMP.FLNparams.PpLN = 3.5
                [Phenology].CAMP.FLNparams.VrnLN = 2.5
                [Phenology].CAMP.FLNparams.VxPLN = -1.5
                [Phenology].CAMP.EnvData.VrnTreatTemp = 5.8
                [Phenology].CAMP.EnvData.VrnTreatDuration = 60
                [Phenology].HeadEmergenceLongDayBase.FixedValue = 190
                [Phenology].HeadEmergencePpSensitivity.FixedValue = 0.5
            Cultivar Calingiri
              Command:
                [Phenology].Phyllochron.BasePhyllochron.FixedValue = 112.665706012865
                [Phenology].PhyllochronPpSensitivity.FixedValue = 0.16928704526596
                [Phenology].CAMP.FLNparams.MinLN = 6.5
                [Phenology].CAMP.FLNparams.PpLN = 1.0
                [Phenology].CAMP.FLNparams.VrnLN = 4.0
                [Phenology].CAMP.FLNparams.VxPLN = 0.0
                [Phenology].CAMP.EnvData.VrnTreatTemp = 5.8
                [Phenology].CAMP.EnvData.VrnTreatDuration = 60
                [Phenology].HeadEmergenceLongDayBase.FixedValue = 190
                [Phenology].HeadEmergencePpSensitivity.FixedValue = 0.0
            Cultivar Catalina
              Command:
                [Phenology].Phyllochron.BasePhyllochron.FixedValue = 93.1373432728081
                [Phenology].PhyllochronPpSensitivity.FixedValue = 0.403019826488085
                [Phenology].CAMP.FLNparams.MinLN = 7.0
                [Phenology].CAMP.FLNparams.PpLN = 1.5
                [Phenology].CAMP.FLNparams.VrnLN = 1.5
                [Phenology].CAMP.FLNparams.VxPLN = -1.5
                [Phenology].CAMP.EnvData.VrnTreatTemp = 5.8
                [Phenology].CAMP.EnvData.VrnTreatDuration = 60
                [Phenology].HeadEmergenceLongDayBase.FixedValue = 270
                [Phenology].HeadEmergencePpSensitivity.FixedValue = 0.0
            Cultivar Condo
              Command:
                [Phenology].Phyllochron.BasePhyllochron.FixedValue = 94.4306598856844
                [Phenology].PhyllochronPpSensitivity.FixedValue = 0.179475706868039
                [Phenology].CAMP.FLNparams.MinLN = 7.0
                [Phenology].CAMP.FLNparams.PpLN = 1.5
                [Phenology].CAMP.FLNparams.VrnLN = 4.0
                [Phenology].CAMP.FLNparams.VxPLN = -1.0
                [Phenology].CAMP.EnvData.VrnTreatTemp = 5.8
                [Phenology].CAMP.EnvData.VrnTreatDuration = 60
                [Phenology].HeadEmergenceLongDayBase.FixedValue = 150
                [Phenology].HeadEmergencePpSensitivity.FixedValue = 0.0
            Cultivar Crusader
              Command:
                [Phenology].Phyllochron.BasePhyllochron.FixedValue = 100.832025052954
                [Phenology].PhyllochronPpSensitivity.FixedValue = 0.199967770650946
                [Phenology].CAMP.FLNparams.MinLN = 6.1
                [Phenology].CAMP.FLNparams.PpLN = 3.0
                [Phenology].CAMP.FLNparams.VrnLN = 1.8000000000000007
                [Phenology].CAMP.FLNparams.VxPLN = 4.0
                [Phenology].CAMP.EnvData.VrnTreatTemp = 6
                [Phenology].CAMP.EnvData.VrnTreatDuration = 60
                [Phenology].HeadEmergenceLongDayBase.FixedValue = 108
                [Phenology].HeadEmergencePpSensitivity.FixedValue = 1.3
            Cultivar CSIROW002
              Command:
                [Phenology].Phyllochron.BasePhyllochron.FixedValue = 97.1048561789481
                [Phenology].PhyllochronPpSensitivity.FixedValue = 0.330486171103675
                [Phenology].CAMP.FLNparams.MinLN = 7.0
                [Phenology].CAMP.FLNparams.PpLN = 1.5
                [Phenology].CAMP.FLNparams.VrnLN = 3.0
                [Phenology].CAMP.FLNparams.VxPLN = 0.0
                [Phenology].CAMP.EnvData.VrnTreatTemp = 5.8
                [Phenology].CAMP.EnvData.VrnTreatDuration = 60
                [Phenology].HeadEmergenceLongDayBase.FixedValue = 210
                [Phenology].HeadEmergencePpSensitivity.FixedValue = 0.5
            Cultivar CSIROW003
              Command:
                [Phenology].Phyllochron.BasePhyllochron.FixedValue = 97.9080402900587
                [Phenology].PhyllochronPpSensitivity.FixedValue = 0.219427317086708
                [Phenology].CAMP.FLNparams.MinLN = 7.0
                [Phenology].CAMP.FLNparams.PpLN = 0.5
                [Phenology].CAMP.FLNparams.VrnLN = 4.0
                [Phenology].CAMP.FLNparams.VxPLN = -1.5
                [Phenology].CAMP.EnvData.VrnTreatTemp = 5.8
                [Phenology].CAMP.EnvData.VrnTreatDuration = 60
                [Phenology].HeadEmergenceLongDayBase.FixedValue = 190
                [Phenology].HeadEmergencePpSensitivity.FixedValue = 0.0
            Cultivar CSIROW005
              Command:
                [Phenology].Phyllochron.BasePhyllochron.FixedValue = 100.324132823901
                [Phenology].PhyllochronPpSensitivity.FixedValue = 0.16547784419225
                [Phenology].CAMP.FLNparams.MinLN = 7.5
                [Phenology].CAMP.FLNparams.PpLN = 0.0
                [Phenology].CAMP.FLNparams.VrnLN = 5.0
                [Phenology].CAMP.FLNparams.VxPLN = -2.0
                [Phenology].CAMP.EnvData.VrnTreatTemp = 5.8
                [Phenology].CAMP.EnvData.VrnTreatDuration = 60
                [Phenology].HeadEmergenceLongDayBase.FixedValue = 170
                [Phenology].HeadEmergencePpSensitivity.FixedValue = 0.0
            Cultivar CSIROW011
              Command:
                [Phenology].Phyllochron.BasePhyllochron.FixedValue = 90.109466190558
                [Phenology].PhyllochronPpSensitivity.FixedValue = 0.349636600984782
                [Phenology].CAMP.FLNparams.MinLN = 6.5
                [Phenology].CAMP.FLNparams.PpLN = 1.0
                [Phenology].CAMP.FLNparams.VrnLN = 1.5
                [Phenology].CAMP.FLNparams.VxPLN = -1.0
                [Phenology].CAMP.EnvData.VrnTreatTemp = 5.8
                [Phenology].CAMP.EnvData.VrnTreatDuration = 60
                [Phenology].HeadEmergenceLongDayBase.FixedValue = 210
                [Phenology].HeadEmergencePpSensitivity.FixedValue = 1.0
            Cultivar CSIROW018
              Command:
                [Phenology].Phyllochron.BasePhyllochron.FixedValue = 100.218976921681
                [Phenology].PhyllochronPpSensitivity.FixedValue = 0.305627551956816
                [Phenology].CAMP.FLNparams.MinLN = 6.5
                [Phenology].CAMP.FLNparams.PpLN = 2.0
                [Phenology].CAMP.FLNparams.VrnLN = 3.0
                [Phenology].CAMP.FLNparams.VxPLN = 0.5
                [Phenology].CAMP.EnvData.VrnTreatTemp = 5.8
                [Phenology].CAMP.EnvData.VrnTreatDuration = 60
                [Phenology].HeadEmergenceLongDayBase.FixedValue = 210
                [Phenology].HeadEmergencePpSensitivity.FixedValue = 0.5
            Cultivar CSIROW021
              Command:
                [Phenology].Phyllochron.BasePhyllochron.FixedValue = 100.85898282236
                [Phenology].PhyllochronPpSensitivity.FixedValue = 0.228645304743823
                [Phenology].CAMP.FLNparams.MinLN = 7.5
                [Phenology].CAMP.FLNparams.PpLN = 1.5
                [Phenology].CAMP.FLNparams.VrnLN = 7.0
                [Phenology].CAMP.FLNparams.VxPLN = -1.0
                [Phenology].CAMP.EnvData.VrnTreatTemp = 5.8
                [Phenology].CAMP.EnvData.VrnTreatDuration = 60
                [Phenology].HeadEmergenceLongDayBase.FixedValue = 230
                [Phenology].HeadEmergencePpSensitivity.FixedValue = 1.5
            Cultivar CSIROW027
              Command:
                [Phenology].Phyllochron.BasePhyllochron.FixedValue = 91.9686702262851
                [Phenology].PhyllochronPpSensitivity.FixedValue = 0.298865609355012
                [Phenology].CAMP.FLNparams.MinLN = 6.0
                [Phenology].CAMP.FLNparams.PpLN = 0.5
                [Phenology].CAMP.FLNparams.VrnLN = 1.0
                [Phenology].CAMP.FLNparams.VxPLN = 0.0
                [Phenology].CAMP.EnvData.VrnTreatTemp = 5.8
                [Phenology].CAMP.EnvData.VrnTreatDuration = 60
                [Phenology].HeadEmergenceLongDayBase.FixedValue = 230
                [Phenology].HeadEmergencePpSensitivity.FixedValue = 1.0
            Cultivar CSIROW029
              Command:
                [Phenology].Phyllochron.BasePhyllochron.FixedValue = 98.5813007346922
                [Phenology].PhyllochronPpSensitivity.FixedValue = 0.228833970802351
                [Phenology].CAMP.FLNparams.MinLN = 6.5
                [Phenology].CAMP.FLNparams.PpLN = 0.5
                [Phenology].CAMP.FLNparams.VrnLN = 0.5
                [Phenology].CAMP.FLNparams.VxPLN = 0.0
                [Phenology].CAMP.EnvData.VrnTreatTemp = 5.8
                [Phenology].CAMP.EnvData.VrnTreatDuration = 60
                [Phenology].HeadEmergenceLongDayBase.FixedValue = 250
                [Phenology].HeadEmergencePpSensitivity.FixedValue = 0.5
            Cultivar CSIROW077
              Command:
                [Phenology].Phyllochron.BasePhyllochron.FixedValue = 89.0413135981221
                [Phenology].PhyllochronPpSensitivity.FixedValue = 0.320389882541901
                [Phenology].CAMP.FLNparams.MinLN = 6.0
                [Phenology].CAMP.FLNparams.PpLN = 0.5
                [Phenology].CAMP.FLNparams.VrnLN = 1.0
                [Phenology].CAMP.FLNparams.VxPLN = -0.5
                [Phenology].CAMP.EnvData.VrnTreatTemp = 5.8
                [Phenology].CAMP.EnvData.VrnTreatDuration = 60
                [Phenology].HeadEmergenceLongDayBase.FixedValue = 270
                [Phenology].HeadEmergencePpSensitivity.FixedValue = 0.5
            Cultivar CSIROW087
              Command:
                [Phenology].Phyllochron.BasePhyllochron.FixedValue = 95.8407854192227
                [Phenology].PhyllochronPpSensitivity.FixedValue = 0.379363409943707
                [Phenology].CAMP.FLNparams.MinLN = 6.0
                [Phenology].CAMP.FLNparams.PpLN = 1.0
                [Phenology].CAMP.FLNparams.VrnLN = 2.5
                [Phenology].CAMP.FLNparams.VxPLN = -1.5
                [Phenology].CAMP.EnvData.VrnTreatTemp = 5.8
                [Phenology].CAMP.EnvData.VrnTreatDuration = 60
                [Phenology].HeadEmergenceLongDayBase.FixedValue = 270
                [Phenology].HeadEmergencePpSensitivity.FixedValue = 1.5
            Cultivar CSIROW102
              Command:
                [Phenology].Phyllochron.BasePhyllochron.FixedValue = 88.798911538629
                [Phenology].PhyllochronPpSensitivity.FixedValue = 0.366324783260731
                [Phenology].CAMP.FLNparams.MinLN = 7.0
                [Phenology].CAMP.FLNparams.PpLN = 1.0
                [Phenology].CAMP.FLNparams.VrnLN = 2.5
                [Phenology].CAMP.FLNparams.VxPLN = -1.5
                [Phenology].CAMP.EnvData.VrnTreatTemp = 5.8
                [Phenology].CAMP.EnvData.VrnTreatDuration = 60
                [Phenology].HeadEmergenceLongDayBase.FixedValue = 230
                [Phenology].HeadEmergencePpSensitivity.FixedValue = 0.5
            Cultivar CSIROW105
              Command:
                [Phenology].Phyllochron.BasePhyllochron.FixedValue = 93.3581645003809
                [Phenology].PhyllochronPpSensitivity.FixedValue = 0.233916879031932
                [Phenology].CAMP.FLNparams.MinLN = 6.0
                [Phenology].CAMP.FLNparams.PpLN = 0.5
                [Phenology].CAMP.FLNparams.VrnLN = 1.0
                [Phenology].CAMP.FLNparams.VxPLN = -0.5
                [Phenology].CAMP.EnvData.VrnTreatTemp = 5.8
                [Phenology].CAMP.EnvData.VrnTreatDuration = 60
                [Phenology].HeadEmergenceLongDayBase.FixedValue = 230
                [Phenology].HeadEmergencePpSensitivity.FixedValue = 1.0
            Cultivar Hume
              Command:
                [Phenology].Phyllochron.BasePhyllochron.FixedValue = 86.6877539944917
                [Phenology].PhyllochronPpSensitivity.FixedValue = 0.340327517277635
                [Phenology].CAMP.FLNparams.MinLN = 7.0
                [Phenology].CAMP.FLNparams.PpLN = 2.5
                [Phenology].CAMP.FLNparams.VrnLN = 1.5
                [Phenology].CAMP.FLNparams.VxPLN = -1.0
                [Phenology].CAMP.EnvData.VrnTreatTemp = 5.8
                [Phenology].CAMP.EnvData.VrnTreatDuration = 60
                [Phenology].HeadEmergenceLongDayBase.FixedValue = 230
                [Phenology].HeadEmergencePpSensitivity.FixedValue = 0.0
            Cultivar Ellison
              Command:
                [Phenology].Phyllochron.BasePhyllochron.FixedValue = 110.512287746208
                [Phenology].PhyllochronPpSensitivity.FixedValue = 0.282156394448543
                [Phenology].CAMP.FLNparams.MinLN = 5.5
                [Phenology].CAMP.FLNparams.PpLN = 4.5
                [Phenology].CAMP.FLNparams.VrnLN = 3.0
                [Phenology].CAMP.FLNparams.VxPLN = 2.0
                [Phenology].CAMP.EnvData.VrnTreatTemp = 5.8
                [Phenology].CAMP.EnvData.VrnTreatDuration = 60
                [Phenology].HeadEmergenceLongDayBase.FixedValue = 210
                [Phenology].HeadEmergencePpSensitivity.FixedValue = 0.5
            Cultivar Emu_Rock
              Command:
                [Phenology].Phyllochron.BasePhyllochron.FixedValue = 94.7698873180009
                [Phenology].PhyllochronPpSensitivity.FixedValue = 0.358007951256312
                [Phenology].CAMP.FLNparams.MinLN = 7.0
                [Phenology].CAMP.FLNparams.PpLN = 1.5
                [Phenology].CAMP.FLNparams.VrnLN = 0.5
                [Phenology].CAMP.FLNparams.VxPLN = -0.5
                [Phenology].CAMP.EnvData.VrnTreatTemp = 5.8
                [Phenology].CAMP.EnvData.VrnTreatDuration = 60
                [Phenology].HeadEmergenceLongDayBase.FixedValue = 230
                [Phenology].HeadEmergencePpSensitivity.FixedValue = 0.0
            Cultivar Forrest
              Command:
                [Phenology].Phyllochron.BasePhyllochron.FixedValue = 99.8910902837222
                [Phenology].PhyllochronPpSensitivity.FixedValue = 0.417874283738016
                [Phenology].CAMP.FLNparams.MinLN = 6.5
                [Phenology].CAMP.FLNparams.PpLN = 3.5
                [Phenology].CAMP.FLNparams.VrnLN = 1.5
                [Phenology].CAMP.FLNparams.VxPLN = 0.0
                [Phenology].CAMP.EnvData.VrnTreatTemp = 5.8
                [Phenology].CAMP.EnvData.VrnTreatDuration = 60
                [Phenology].HeadEmergenceLongDayBase.FixedValue = 290
                [Phenology].HeadEmergencePpSensitivity.FixedValue = 1.0
            Cultivar Grenade
              Command:
                [Phenology].Phyllochron.BasePhyllochron.FixedValue = 96.8120116390919
                [Phenology].PhyllochronPpSensitivity.FixedValue = 0.3478103654812
                [Phenology].CAMP.FLNparams.MinLN = 6.5
                [Phenology].CAMP.FLNparams.PpLN = 3.0
                [Phenology].CAMP.FLNparams.VrnLN = 1.5
                [Phenology].CAMP.FLNparams.VxPLN = 0.0
                [Phenology].CAMP.EnvData.VrnTreatTemp = 5.8
                [Phenology].CAMP.EnvData.VrnTreatDuration = 60
                [Phenology].HeadEmergenceLongDayBase.FixedValue = 210
                [Phenology].HeadEmergencePpSensitivity.FixedValue = 0.0
            Cultivar Kittyhawk
              Command:
                [Phenology].Phyllochron.BasePhyllochron.FixedValue = 93.7220123291132
                [Phenology].PhyllochronPpSensitivity.FixedValue = 0.212225680614483
                [Phenology].CAMP.FLNparams.MinLN = 8.5
                [Phenology].CAMP.FLNparams.PpLN = 3.0
                [Phenology].CAMP.FLNparams.VrnLN = 7.0
                [Phenology].CAMP.FLNparams.VxPLN = 1.0
                [Phenology].CAMP.EnvData.VrnTreatTemp = 5.8
                [Phenology].CAMP.EnvData.VrnTreatDuration = 60
                [Phenology].HeadEmergenceLongDayBase.FixedValue = 170
                [Phenology].HeadEmergencePpSensitivity.FixedValue = 0.0
            Cultivar Lancer
              Command:
                [Phenology].Phyllochron.BasePhyllochron.FixedValue = 85.6623042725763
                [Phenology].PhyllochronPpSensitivity.FixedValue = 0.324980109776406
                [Phenology].CAMP.FLNparams.MinLN = 8.0
                [Phenology].CAMP.FLNparams.PpLN = 3.5
                [Phenology].CAMP.FLNparams.VrnLN = 3.5
                [Phenology].CAMP.FLNparams.VxPLN = -3.5
                [Phenology].CAMP.EnvData.VrnTreatTemp = 5.8
                [Phenology].CAMP.EnvData.VrnTreatDuration = 60
                [Phenology].HeadEmergenceLongDayBase.FixedValue = 170
                [Phenology].HeadEmergencePpSensitivity.FixedValue = 0.0
            Cultivar Nighthawk
              Command:
                [Phenology].Phyllochron.BasePhyllochron.FixedValue = 97.5749140549815
                [Phenology].PhyllochronPpSensitivity.FixedValue = 0.234188946138953
                [Phenology].CAMP.FLNparams.MinLN = 8.0
                [Phenology].CAMP.FLNparams.PpLN = 2.5
                [Phenology].CAMP.FLNparams.VrnLN = 4.0
                [Phenology].CAMP.FLNparams.VxPLN = -1.0
                [Phenology].CAMP.EnvData.VrnTreatTemp = 5.8
                [Phenology].CAMP.EnvData.VrnTreatDuration = 60
                [Phenology].HeadEmergenceLongDayBase.FixedValue = 250
                [Phenology].HeadEmergencePpSensitivity.FixedValue = 1.0
            Cultivar Magenta
              Command:
                [Phenology].Phyllochron.BasePhyllochron.FixedValue = 113.040956826707
                [Phenology].PhyllochronPpSensitivity.FixedValue = 0.138444741551648
                [Phenology].CAMP.FLNparams.MinLN = 5.5
                [Phenology].CAMP.FLNparams.PpLN = 3.0
                [Phenology].CAMP.FLNparams.VrnLN = 4.5
                [Phenology].CAMP.FLNparams.VxPLN = 1.5
                [Phenology].CAMP.EnvData.VrnTreatTemp = 5.8
                [Phenology].CAMP.EnvData.VrnTreatDuration = 60
                [Phenology].HeadEmergenceLongDayBase.FixedValue = 170
                [Phenology].HeadEmergencePpSensitivity.FixedValue = 0.0
            Cultivar Manning
              Command:
                [Phenology].Phyllochron.BasePhyllochron.FixedValue = 104.816433323058
                [Phenology].PhyllochronPpSensitivity.FixedValue = 0.253254338348875
                [Phenology].CAMP.FLNparams.MinLN = 10.0
                [Phenology].CAMP.FLNparams.PpLN = 5.0
                [Phenology].CAMP.FLNparams.VrnLN = 9.899999999999999
                [Phenology].CAMP.FLNparams.VxPLN = -3.299999999999997
                [Phenology].CAMP.EnvData.VrnTreatTemp = 6
                [Phenology].CAMP.EnvData.VrnTreatDuration = 60
                [Phenology].HeadEmergenceLongDayBase.FixedValue = 85
                [Phenology].HeadEmergencePpSensitivity.FixedValue = 3.3
            Cultivar Merinda
              Command:
                [Phenology].Phyllochron.BasePhyllochron.FixedValue = 98.5779272570712
                [Phenology].PhyllochronPpSensitivity.FixedValue = 0.347160824156039
                [Phenology].CAMP.FLNparams.MinLN = 7.0
                [Phenology].CAMP.FLNparams.PpLN = 1.5
                [Phenology].CAMP.FLNparams.VrnLN = 1.0
                [Phenology].CAMP.FLNparams.VxPLN = -0.5
                [Phenology].CAMP.EnvData.VrnTreatTemp = 5.8
                [Phenology].CAMP.EnvData.VrnTreatDuration = 60
                [Phenology].HeadEmergenceLongDayBase.FixedValue = 250
                [Phenology].HeadEmergencePpSensitivity.FixedValue = 0.0
            Cultivar Mitch
              Command:
                [Phenology].Phyllochron.BasePhyllochron.FixedValue = 90.7949886258521
                [Phenology].PhyllochronPpSensitivity.FixedValue = 0.313387918745248
                [Phenology].CAMP.FLNparams.MinLN = 8.0
                [Phenology].CAMP.FLNparams.PpLN = 1.5
                [Phenology].CAMP.FLNparams.VrnLN = 3.5
                [Phenology].CAMP.FLNparams.VxPLN = -1.5
                [Phenology].CAMP.EnvData.VrnTreatTemp = 5.8
                [Phenology].CAMP.EnvData.VrnTreatDuration = 60
                [Phenology].HeadEmergenceLongDayBase.FixedValue = 210
                [Phenology].HeadEmergencePpSensitivity.FixedValue = 0.0
            Cultivar Ouyen
              Command:
                [Phenology].Phyllochron.BasePhyllochron.FixedValue = 84.1472430387947
                [Phenology].PhyllochronPpSensitivity.FixedValue = 0.332456383177313
                [Phenology].CAMP.FLNparams.MinLN = 7.5
                [Phenology].CAMP.FLNparams.PpLN = 2.5
                [Phenology].CAMP.FLNparams.VrnLN = 2.5
                [Phenology].CAMP.FLNparams.VxPLN = -1.5
                [Phenology].CAMP.EnvData.VrnTreatTemp = 5.8
                [Phenology].CAMP.EnvData.VrnTreatDuration = 60
                [Phenology].HeadEmergenceLongDayBase.FixedValue = 190
                [Phenology].HeadEmergencePpSensitivity.FixedValue = 0.5
            Cultivar Peake
              Command:
                [Phenology].Phyllochron.BasePhyllochron.FixedValue = 87.7433052533018
                [Phenology].PhyllochronPpSensitivity.FixedValue = 0.44431162843274
                [Phenology].CAMP.FLNparams.MinLN = 7.0
                [Phenology].CAMP.FLNparams.PpLN = 1.5
                [Phenology].CAMP.FLNparams.VrnLN = 1.0
                [Phenology].CAMP.FLNparams.VxPLN = -0.5
                [Phenology].CAMP.EnvData.VrnTreatTemp = 5.8
                [Phenology].CAMP.EnvData.VrnTreatDuration = 60
                [Phenology].HeadEmergenceLongDayBase.FixedValue = 210
                [Phenology].HeadEmergencePpSensitivity.FixedValue = 0.5
            Cultivar Revenue
              Command:
                [Phenology].Phyllochron.BasePhyllochron.FixedValue = 113.782112306367
                [Phenology].PhyllochronPpSensitivity.FixedValue = 0.155926785053575
                [Phenology].CAMP.FLNparams.MinLN = 8.5
                [Phenology].CAMP.FLNparams.PpLN = 3.0
                [Phenology].CAMP.FLNparams.VrnLN = 6.0
                [Phenology].CAMP.FLNparams.VxPLN = 2.5
                [Phenology].CAMP.EnvData.VrnTreatTemp = 5.8
                [Phenology].CAMP.EnvData.VrnTreatDuration = 60
                [Phenology].HeadEmergenceLongDayBase.FixedValue = 250
                [Phenology].HeadEmergencePpSensitivity.FixedValue = 0.0
            Cultivar Rosella
              Command:
                [Phenology].Phyllochron.BasePhyllochron.FixedValue = 96.7111881914136
                [Phenology].PhyllochronPpSensitivity.FixedValue = 0.209478791477046
                [Phenology].CAMP.FLNparams.MinLN = 8.0
                [Phenology].CAMP.FLNparams.PpLN = 4.5
                [Phenology].CAMP.FLNparams.VrnLN = 6.0
                [Phenology].CAMP.FLNparams.VxPLN = 2.5
                [Phenology].CAMP.EnvData.VrnTreatTemp = 5.8
                [Phenology].CAMP.EnvData.VrnTreatDuration = 60
                [Phenology].HeadEmergenceLongDayBase.FixedValue = 150
                [Phenology].HeadEmergencePpSensitivity.FixedValue = 0.0
            Cultivar Scout
              Command:
                [Phenology].Phyllochron.BasePhyllochron.FixedValue = 102.794916048683
                [Phenology].PhyllochronPpSensitivity.FixedValue = 0.192036818570067
                [Phenology].CAMP.FLNparams.MinLN = 6.0
                [Phenology].CAMP.FLNparams.PpLN = 5.699999999999999
                [Phenology].CAMP.FLNparams.VrnLN = 2.5
                [Phenology].CAMP.FLNparams.VxPLN = 1.4000000000000004
                [Phenology].CAMP.EnvData.VrnTreatTemp = 6
                [Phenology].CAMP.EnvData.VrnTreatDuration = 60
                [Phenology].HeadEmergenceLongDayBase.FixedValue = 189
                [Phenology].HeadEmergencePpSensitivity.FixedValue = 0.0
            Cultivar Spitfire
              Command:
                [Phenology].Phyllochron.BasePhyllochron.FixedValue = 87.8426291924597
                [Phenology].PhyllochronPpSensitivity.FixedValue = 0.226170449889058
                [Phenology].CAMP.FLNparams.MinLN = 6.5
                [Phenology].CAMP.FLNparams.PpLN = 2.0
                [Phenology].CAMP.FLNparams.VrnLN = 3.5
                [Phenology].CAMP.FLNparams.VxPLN = 0.0
                [Phenology].CAMP.EnvData.VrnTreatTemp = 5.8
                [Phenology].CAMP.EnvData.VrnTreatDuration = 60
                [Phenology].HeadEmergenceLongDayBase.FixedValue = 170
                [Phenology].HeadEmergencePpSensitivity.FixedValue = 0.0
            Cultivar Strzelecki
              Command:
                [Phenology].Phyllochron.BasePhyllochron.FixedValue = 96.5633530493006
                [Phenology].PhyllochronPpSensitivity.FixedValue = 0.245575047413057
                [Phenology].CAMP.FLNparams.MinLN = 7.5
                [Phenology].CAMP.FLNparams.PpLN = 1.0
                [Phenology].CAMP.FLNparams.VrnLN = 5.5
                [Phenology].CAMP.FLNparams.VxPLN = -1.5
                [Phenology].CAMP.EnvData.VrnTreatTemp = 5.8
                [Phenology].CAMP.EnvData.VrnTreatDuration = 60
                [Phenology].HeadEmergenceLongDayBase.FixedValue = 190
                [Phenology].HeadEmergencePpSensitivity.FixedValue = 0.0
            Cultivar Sunbee
              Command:
                [Phenology].Phyllochron.BasePhyllochron.FixedValue = 97.2940011008473
                [Phenology].PhyllochronPpSensitivity.FixedValue = 0.185142054210791
                [Phenology].CAMP.FLNparams.MinLN = 7.0
                [Phenology].CAMP.FLNparams.PpLN = 1.0
                [Phenology].CAMP.FLNparams.VrnLN = 3.5
                [Phenology].CAMP.FLNparams.VxPLN = -1.5
                [Phenology].CAMP.EnvData.VrnTreatTemp = 5.8
                [Phenology].CAMP.EnvData.VrnTreatDuration = 60
                [Phenology].HeadEmergenceLongDayBase.FixedValue = 170
                [Phenology].HeadEmergencePpSensitivity.FixedValue = 0.0
            Cultivar Sunlamb
              Command:
                [Phenology].Phyllochron.BasePhyllochron.FixedValue = 100.382265746297
                [Phenology].PhyllochronPpSensitivity.FixedValue = 0.154235967458266
                [Phenology].CAMP.FLNparams.MinLN = 7.5
                [Phenology].CAMP.FLNparams.PpLN = 2.5
                [Phenology].CAMP.FLNparams.VrnLN = 3.5
                [Phenology].CAMP.FLNparams.VxPLN = 2.0
                [Phenology].CAMP.EnvData.VrnTreatTemp = 5.8
                [Phenology].CAMP.EnvData.VrnTreatDuration = 60
                [Phenology].HeadEmergenceLongDayBase.FixedValue = 230
                [Phenology].HeadEmergencePpSensitivity.FixedValue = 2.0
            Cultivar Sunstate
              Command:
                [Phenology].Phyllochron.BasePhyllochron.FixedValue = 95.0758950229683
                [Phenology].PhyllochronPpSensitivity.FixedValue = 0.225986092694718
                [Phenology].CAMP.FLNparams.MinLN = 5.1
                [Phenology].CAMP.FLNparams.PpLN = 4.6
                [Phenology].CAMP.FLNparams.VrnLN = 0.0
                [Phenology].CAMP.FLNparams.VxPLN = 1.7000000000000002
                [Phenology].CAMP.EnvData.VrnTreatTemp = 6
                [Phenology].CAMP.EnvData.VrnTreatDuration = 60
                [Phenology].HeadEmergenceLongDayBase.FixedValue = 95
                [Phenology].HeadEmergencePpSensitivity.FixedValue = 6.7
            Cultivar Suntop
              Command:
                [Phenology].Phyllochron.BasePhyllochron.FixedValue = 93.1036394598307
                [Phenology].PhyllochronPpSensitivity.FixedValue = 0.335203758711104
                [Phenology].CAMP.FLNparams.MinLN = 8.0
                [Phenology].CAMP.FLNparams.PpLN = 1.0
                [Phenology].CAMP.FLNparams.VrnLN = 1.0
                [Phenology].CAMP.FLNparams.VxPLN = -0.5
                [Phenology].CAMP.EnvData.VrnTreatTemp = 5.8
                [Phenology].CAMP.EnvData.VrnTreatDuration = 60
                [Phenology].HeadEmergenceLongDayBase.FixedValue = 170
                [Phenology].HeadEmergencePpSensitivity.FixedValue = 0.0
            Cultivar Trojan
              Command:
                [Phenology].Phyllochron.BasePhyllochron.FixedValue = 99.1351271229079
                [Phenology].PhyllochronPpSensitivity.FixedValue = 0.35511766231399
                [Phenology].CAMP.FLNparams.MinLN = 6.0
                [Phenology].CAMP.FLNparams.PpLN = 8.4
                [Phenology].CAMP.FLNparams.VrnLN = 3.200000000000001
                [Phenology].CAMP.FLNparams.VxPLN = -1.200000000000001
                [Phenology].CAMP.EnvData.VrnTreatTemp = 6
                [Phenology].CAMP.EnvData.VrnTreatDuration = 60
                [Phenology].HeadEmergenceLongDayBase.FixedValue = 50
                [Phenology].HeadEmergencePpSensitivity.FixedValue = 3.8
            Cultivar Illabo
              Command:
                [Phenology].Phyllochron.BasePhyllochron.FixedValue = 100.550798402656
                [Phenology].PhyllochronPpSensitivity.FixedValue = 0.238435422022958
                [Phenology].CAMP.FLNparams.MinLN = 7.5
                [Phenology].CAMP.FLNparams.PpLN = 1.0
                [Phenology].CAMP.FLNparams.VrnLN = 7.0
                [Phenology].CAMP.FLNparams.VxPLN = -0.5
                [Phenology].CAMP.EnvData.VrnTreatTemp = 5.8
                [Phenology].CAMP.EnvData.VrnTreatDuration = 60
                [Phenology].HeadEmergenceLongDayBase.FixedValue = 170
                [Phenology].HeadEmergencePpSensitivity.FixedValue = 0.0
            Cultivar Whistler
              Command:
                [Phenology].Phyllochron.BasePhyllochron.FixedValue = 101.152462224521
                [Phenology].PhyllochronPpSensitivity.FixedValue = 0.160519169483945
                [Phenology].CAMP.FLNparams.MinLN = 8.0
                [Phenology].CAMP.FLNparams.PpLN = 2.0
                [Phenology].CAMP.FLNparams.VrnLN = 7.0
                [Phenology].CAMP.FLNparams.VxPLN = 0.0
                [Phenology].CAMP.EnvData.VrnTreatTemp = 5.8
                [Phenology].CAMP.EnvData.VrnTreatDuration = 60
                [Phenology].HeadEmergenceLongDayBase.FixedValue = 170
                [Phenology].HeadEmergencePpSensitivity.FixedValue = 0.0
            Cultivar Drysdale
              Command:
                [Phenology].CAMP.FLNparams.MinLN = 5.0
                [Phenology].CAMP.FLNparams.PpLN = 4.5
                [Phenology].CAMP.FLNparams.VrnLN = 4.199999999999999
                [Phenology].CAMP.FLNparams.VxPLN = -4.199999999999999
                [Phenology].HeadEmergenceLongDayBase.FixedValue = 50
                [Phenology].HeadEmergencePpSensitivity.FixedValue = 0.0
                [Phenology].CAMP.EnvData.VrnTreatTemp = 6
                [Phenology].CAMP.EnvData.VrnTreatDuration = 60
        Constant MortalityRate: FixedValue=0
        Constant SeedMortalityRate: FixedValue=0
    SoilArbitrator
  DataStore
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