Simulations: Version=195
  DataStore
  Simulation
    Weather: FileName=%root%/Examples/WeatherFiles/AU_WaggaWagga.met
    Clock: Start=1991-07-01; End=1996-06-30
    Summary
    SoilArbitrator Soil Arbitrator
    MicroClimate: a_interception=0; b_interception=1; c_interception=0; d_interception=0; SoilHeatFluxFraction=0.4; MinimumHeightDiffForNewLayer=0; NightInterceptionFraction=0.5; ReferenceHeight=2
    Zone Plantation: Area=1; Slope=0; AspectAngle=0; Altitude=50
      Soil: Latitude=0; Longitude=0
        Water: Thickness=[100, 300, 600, 1000, 1000, 1000, 1000, 1000]; InitialValues=[0.138, 0.13, 0.122, 0.114, 0.106, 0.106, 0.106, 0.106]; InitialPAWmm=364; RelativeTo=LL15; FilledFromTop=false
        Physical
          Thickness  BD    AirDry  LL15  DUL   SAT
          100        1.5   0.01    0.05  0.16  0.29
          300        1.6   0.01    0.05  0.15  0.29
          600        1.68  0.01    0.05  0.14  0.29
          1000       1.75  0.02    0.05  0.13  0.29
          1000       1.7   0.05    0.05  0.12  0.29
          1000       1.7   0.05    0.05  0.12  0.29
          1000       1.7   0.05    0.05  0.12  0.29
          1000       1.7   0.05    0.05  0.12  0.29
          SoilCrop EucalyptusSoil: LL=[0.05, 0.05, 0.05, 0.05, 0.05, 0.05, 0.05, 0.05]; KL=[0.07, 0.07, 0.05, 0.02, 0.02, 0.02, 0.01, 0.01]; XF=[1, 1, 1, 1, 0.3, 0.2, 0, 0]
          SoilCrop SCRUMSoil: LL=[0.05, 0.05, 0.05, 0.05, 0.05, 0.05, 0.05, 0.05]; KL=[0.07, 0.07, 0.05, 0.02, 0.02, 0.02, 0.01, 0.01]; XF=[1, 1, 1, 1, 0.3, 0.2, 0, 0]
        WaterBalance SoilWater: SummerDate=1-Nov; SummerU=4; SummerCona=3.5; WinterDate=1-Apr; WinterU=4; WinterCona=3.5; DiffusConst=88; DiffusSlope=35.4; Salb=0.13; CN2Bare=65; CNRed=20; CNCov=0.8; DischargeWidth=0; CatchmentArea=0; PSIDul=-100
          Thickness  SWCON  KLAT
          100        0.9    0
          300        0.9    0
          600        0.9    0
          1000       0.6    0
          1000       0.6    0
          1000       0.6    0
          1000       0.6    0
          1000       0.6    0
        Organic: FOMCNRatio=60; CarbonUnits=Total
          Thickness  Carbon  SoilCNRatio  FBiom  FInert  FOM
          100        2       14.5         0.04   0.4     0.29407
          300        1       14.5         0.03   0.5     0.253108
          600        0.5     14.5         0.02   0.5     0.187507
          1000       0.2     14.5         0.01   0.5     0.113729
          1000       0.12    14.5         0.01   0.9     0.06898
          1000       0.1     14.5         0.01   0.99    0.0418385
          1000       0.1     14.5         0.01   0.99    0.0253763
          1000       0.1     14.5         0.01   0.99    0.0153915
        Chemical: Thickness=[100, 300, 600, 1000, 1000, 1000, 1000, 1000]; PH=[5.8, 5.7, 5.7, 5.9, 5.7, 5.7, 5.7, 5.7]; PHUnits=Water
        Nutrient
        Solute NO3: Thickness=[100, 300, 600, 1000, 1000, 1000, 1000, 1000]; InitialValues=[10, 5, 2, 1, 1, 1, 1, 1]; InitialValuesUnits=ppm; WaterTableConcentration=0; D0=0; DepthConstant=0; MaxDepthSoluteAccessible=0; RunoffEffectivenessAtMovingSolute=0; MaxEffectiveRunoff=0
        Solute NH4: same as Simulation.Plantation.Soil.NO3
        Solute Urea: Thickness=[100, 300, 600, 1000, 1000, 1000, 1000, 1000]; InitialValues=[0, 0, 0, 0, 0, 0, 0, 0]; InitialValuesUnits=kg/ha; WaterTableConcentration=0; D0=0; DepthConstant=0; MaxDepthSoluteAccessible=0; RunoffEffectivenessAtMovingSolute=0; MaxEffectiveRunoff=0
        SoilTemperature Temperature
      Irrigation
      Fertiliser
      SurfaceOrganicMatter: InitialResidueName=Wheat; InitialResidueType=Wheat; InitialResidueMass=2000; InitialStandingFraction=0; InitialCPR=0; InitialCNR=80
      Plant Eucalyptus
      Plant SCRUM
      Report: EventNames=[Clock].DoReport
        VariableNames:
          [Clock].Today
          [Eucalyptus].Age
          [Eucalyptus].AboveGround.Wt
          [Eucalyptus].BelowGround.Wt
          [Eucalyptus].Total.Wt
          [Eucalyptus].Stem.Wt
          [Eucalyptus].FineRoot.Wt
          [Eucalyptus].CoarseRoot.Wt
          [Eucalyptus].Total.N
          [Eucalyptus].Branch.Wt
          [Eucalyptus].Leaf.Transpiration
          [Eucalyptus].Leaf.CoverGreen
          [Eucalyptus].Leaf.LAI
          [Eucalyptus].Stem.DBH
          [Eucalyptus].Stem.Ht
          [Eucalyptus].RootShootRatio
          [SCRUM].Stover.LAI
          [SCRUM].Stover.LAIDead
          [SCRUM].Stover.Wt
          [SCRUM].Stover.CoverGreen
          [SCRUM].Stover.CoverDead
          [SCRUM].Stover.LaiDead.Senescence
          [SCRUM].Stover.LaiDead.Removal
          [SCRUM].Stover.ExtinctionCoefficient
          [SCRUM].Stover.Cover.Growth.Expansion.Delta.Integral.Ymax
      Manager TreeTransplantRule
        RowSpace = 3
        RowWidth = 3
        CultivarName = grandisCoffsHarbour
        SowingDate = 07/01/1991 00:00:00
```csharp
using Models.Soils;
using System.Linq;
using System;
using Models.Core;
using Models.PMF;
namespace Models
{
    [Serializable] 
    [System.Xml.Serialization.XmlInclude(typeof(Model))]
    public class Script : Model
    {
        [Link(ByName = true)] Plant Eucalyptus;
        [Link] Clock Clock;

        [Description("Spacing (m) between plants within rows")]
        public double RowSpace { get; set; }
        [Description("Spacing (m) between rows")]
        public double RowWidth { get; set; }

        [Description("Cultivar")]
        [Display(Type=DisplayType.CultivarName, PlantName = "Eucalyptus")]
        public string CultivarName { get; set; }
        [Description("Sowing Date")]
        public DateTime SowingDate { get; set; }

        [EventSubscribe("DoManagement")]
        private void OnDoManagement(object sender, EventArgs e)
        {
            double PlantPopulation = 1 / (RowWidth * RowSpace);

            if (Clock.Today.Date == SowingDate)
                Eucalyptus.Sow(population: PlantPopulation, 
                    cultivar: CultivarName, 
                    depth: 100, 
                    rowSpacing: 150);
            //Plant.Sow(... Contains the following arguements:
            //Population  double  Required  Seeds sowing/m2
            //Cultivar    string  Required  "NameOfCultivar"
            //Depth       double  Optional  Depth (mm) seed sown.   Default is 100mm 
            //MaxCover    double  Optional  Proportion (0-1) of the ground row crop will cover.   Default is 1.0
            //BudNumber   double  Optional  Number of mainstems per seed sown.  Default is 1.0
            //RowSpacing  double  Optional  Spaceing (mm) between drill rows when crop is sown.  Default is 150mm
            //CropClass   string  Optional  Crop class to instantiate when crop is sown.  Default is "Plant"
        }
    }
}
```
      Manager AutoFertigate
        FASW = 0
        WaterDeficit = 0
        AutoIrrigationOn = True
        FASWThreshold = 0.5
        FASWDepth = 600
        NConc = 4
```csharp
using APSIM.Numerics;
using Models.Soils.Nutrients;
using System.Linq;
using System;
using Models.Core;
using System.Collections.Generic;
using System.Text;
using Models.Soils;
using Models.PMF;
using Models;
using System.Xml.Serialization;
using APSIM.Shared.Utilities;
using Models.Interfaces;

namespace Models
{
    [Serializable] 
    public class Script : Model
    {
        [Link] private Plant Chickpea;
        [Link] private Zone zone;
        [Link] private Irrigation irrigation;
        [Link] private Fertiliser fertiliser;
        [Link] private Soil soil;
        [Link]
        private IPhysical soilPhysical;
        [Link]
        private ISoilWater waterBalance;
        public double FASW { get; set; }
        public double WaterDeficit  { get; set; }
    
        
        [Description("Auto irrigation on?")]
        public bool AutoIrrigationOn { get; set; }
        
        [Description("Threshold fraction available water (0-1)")]
        public double FASWThreshold { get; set; }

        [Description("Soil depth (mm) to which fraction available water is calculated")]
        public double FASWDepth { get; set; }

        [Description("N Concentration in irrigation water (ppm)")]
        public double NConc { get; set; }

        [EventSubscribe("DoManagement")]
        private void OnDoManagement(object sender, EventArgs e)
        {
            CalculateFASW();
            if (AutoIrrigationOn)
            {
                if (FASW < FASWThreshold)
                {
                    double amount = WaterDeficit * 10000.0 * NConc/1000000.0;
                    irrigation.Apply(WaterDeficit, depth: 0);
                    fertiliser.Apply(amount: amount, type: "NO3N");
                }
            }
        }
        
        private void CalculateFASW()
        {
            double[] LL15 = MathUtilities.Multiply(soilPhysical.LL15, soilPhysical.Thickness);
            double[] DUL = MathUtilities.Multiply(soilPhysical.DUL, soilPhysical.Thickness);
        
            int nlayr = GetLayerIndex();
            double cumdep = MathUtilities.Sum(soilPhysical.Thickness, 0, nlayr, 0.0);

            double excess_fr = MathUtilities.Divide((cumdep - FASWDepth), soilPhysical.Thickness[nlayr], 0.0);

            // note that results may be strange if swdep < ll15
            double avail_sw = (MathUtilities.Sum(waterBalance.SWmm, 0, nlayr, 0.0)
                              - excess_fr * waterBalance.SWmm[nlayr])
                              - (MathUtilities.Sum(LL15, 0, nlayr, 0.0)
                              - excess_fr * LL15[nlayr]);


            double pot_avail_sw = (MathUtilities.Sum(DUL, 0, nlayr, 0.0)
                                  - excess_fr * DUL[nlayr])
                                  - (MathUtilities.Sum(LL15, 0, nlayr, 0.0)
                                  - excess_fr * LL15[nlayr]);

            FASW = MathUtilities.Divide(avail_sw, pot_avail_sw, 0.0);
            WaterDeficit = MathUtilities.Constrain(pot_avail_sw - avail_sw, 0.0, 100000);
        }

        private int GetLayerIndex()
        {
            double[] cumThickness = soilPhysical.ThicknessCumulative;
            for (int i = 1; i < cumThickness.Length; i++)
            {
                if (FASWDepth < cumThickness[i])
                    return i - 1;
            }
            
            return cumThickness.Length - 1;
        }

    }
}
```
      Operations WeedSowing
      Manager EstablishWeed
        CropName = Barley
        EstablishDates = 1991-07-01, 1992-07-01, 1993-07-01
        EstablishStage = Seed
        PlantingDepth = 10
        HarvestTimeOption = SettingThermalTime
        HarvestDate = 01/01/0001 00:00:00
        Tt_EstablishToHarvest = 1800
        HarvestStage = Maturity
        ExpectedYield = 8
        FieldLoss = 0
        ResidueRemoval = 0
        ResidueIncorporation = 1
        ResidueIncorporationDepth = 150
```csharp
using System;
using System.Linq;
using APSIM.Shared.Utilities;
using Models.Core;
using Models.Soils;
using Models.PMF;
using Models.PMF.SimplePlantModels;
using Models.Utilities;

namespace Models
{
    [Serializable]
    public class Script : Model
    {
        [Link] Clock clock;
        [Link] Zone zone;
        [Link(Type = LinkType.Scoped, ByName = true)]
        public Plant scrum = null;

        [Separator("Define the SCRUM crop to plant and its basic management")]

        /// <summary>SCRUM crop to stablish</summary>
        [Description("Chose the crop to plant:")]
        [Display(Type = DisplayType.SCRUMcropName)]
        public string CropName { get; set; }

        [Separator("Specify establishment and harvest conditions for this crop")]

        /// <summary>Date to establishment the crop</summary>
        [Description("Establishment dates, comma seperated (dd-mmm or dd/mm/yyyy):")]
        public string[] EstablishDates { get; set; }

        /// <summary>Stages at which the SCRUM is established</summary>
        [Description("Choose the establishment stage")]
        [Display(Type = DisplayType.ScrumEstablishStages)]
        public string EstablishStage {get; set;}

        /// <summary>Depth at which the crop/seeds are planted.</summary>
        [Description(" Planting depth (mm):")]
        public double PlantingDepth { get; set; }

        /// <summary>Choice on how the duration of crop is defined</summary>
        [Description("Choose how the crop cycle is defined:")]
        public HarvestTimingOption HarvestTimeOption {get; set;}

        private bool isHarvestDateDefined { get { return HarvestTimeOption == HarvestTimingOption.SettingDate; } }
        private bool isThermalTimeDefined { get { return HarvestTimeOption == HarvestTimingOption.SettingThermalTime; } }

        /// <summary>Date to establishment the crop</summary>
        [Description("  Harvest date (dd/mm/yyyy):")]
        [Display(VisibleCallback = "isHarvestDateDefined")]
        public DateTime HarvestDate { get; set; }

        /// <summary>Thermal time from establishment to harvest (if blank or zero must specify harvest date)</summary>
        [Description("  Thermal time from establishment to harvest (oCd):")]
        [Display(VisibleCallback = "isThermalTimeDefined")]
        public double Tt_EstablishToHarvest { get; set; }

        /// <summary>Stage at which the crop is to be harvested at</summary>
        [Description("Choose the stage to harvest the crop:")]
        [Display(Type = DisplayType.ScrumHarvestStages)]
        public string HarvestStage {get; set;}

        [Separator("Specify an appropriate potential yield for the crop (based on assumed genotype, sowing date, and local conditions)\n" +
                   "  *SCRUM will reduce yield if water or N stress are predicted")]

        /// <summary>Expected crop yield (t FW/ha)</summary>
        [Description("Potential crop yield, fresh weight (t/ha)")]
        public double ExpectedYield {get; set;}

        [Separator("Specify proportions of field loss and residue removal at harvest")]

        /// <summary>Proportion of product that is left in the field at harvest (due to disease, market, ect.)</summary>
        [Description("Proportion of product lost in the field at harvest (0-1):")]
        public double FieldLoss { get; set; }

        /// <summary>Proportion of stover that is removed from the field at harvest (e.g., bailing)</summary>
        [Description("Proportion of stover removed from the field at harvest (0-1):")]
        public double ResidueRemoval { get; set; }

        /// <summary>Proportion of residues that is incorporated by cultivation after harvest</summary>
        [Description("Proportion of residue incorporated to soil at harvest (0-1):")]
        public double ResidueIncorporation { get; set; }

        /// <summary>Depth down to which the residues that are incorporated to by cultivation after harvest</summary>
        [Description("Depth to incorporate residues (mm):")]
        public double ResidueIncorporationDepth { get; set; }

        private ScrumManagementInstance management;


        [EventSubscribe("DoManagement")]
        private void OnDoManagement(object sender, EventArgs e)
        {
            foreach (string date in EstablishDates)
                {
                    DateTime estabDate = DateUtilities.GetDate(date, clock.Today.Year);
                    if (DateTime.Compare(clock.Today, estabDate) == 0)
                    {
                        if (isHarvestDateDefined && (HarvestDate <= clock.Today))
                        {
                            throw new Exception("Harvest date is earlier than establishment date");
                        }

                        management = new ScrumManagementInstance(cropName: CropName,
                                                                 establishDate: clock.Today,
                                                                 establishStage: EstablishStage,
                                                                 plantingDepth: PlantingDepth,
                                                                 harvestStage: HarvestStage,
                                                                 expectedYield: ExpectedYield,
                                                                 harvestDate: isHarvestDateDefined? HarvestDate : null,
                                                                 ttEstablishmentToHarvest: isThermalTimeDefined? Tt_EstablishToHarvest: double.NaN,
                                                                 fieldLoss: FieldLoss,
                                                                 residueRemoval: ResidueRemoval,
                                                                 residueIncorporation: ResidueIncorporation,
                                                                 residueIncorporationDepth: ResidueIncorporationDepth);
                        ScrumCropInstance currentCrop = zone.FindDescendant<ScrumCropInstance>(CropName);
                        currentCrop.Establish(management);
                     }
            }
        }

        /// <summary>Flag how harvest time is defined.</summary>
        public enum HarvestTimingOption
        {
            /// <summary>A date is to be used.</summary>
            SettingDate,
            /// <summary>A given thermal time sum is to be used.</summary>
            SettingThermalTime
        }
    }
}
```
      Manager Harvesting
        Crop = [SCRUM]
```csharp
using Models.Soils.Nutrients;
using System.Linq;
using System;
using Models.Core;
using Models.PMF;
using Models.Soils;
using Models.Soils.Nutrients;
using Models.Utilities;
using APSIM.Shared.Utilities;

namespace Models
{
    [Serializable] 
    public class Script : Model
    {
        [Description("Crop")]
        public IPlant Crop { get; set; }
        
        [EventSubscribe("DoManagement")]
        private void OnDoManagement(object sender, EventArgs e)
        {
            if (Crop.IsReadyForHarvesting)
            {
                Crop.Harvest();
                Crop.EndCrop();
            }
        }
    }
}
```
      ScrumCropInstance Barley: HarvestIndex=0.463; MoistureContent=0.13; RootProportion=0.1; MaxRootDepth=1200; MaxHeight=1000; MaxCover=0.97; ExtinctionCoefficient=0.5; TypicalHarvestStage=Maturity; SeedlingNConc=0.05; ProductHarvestNConc=0.012; StoverHarvestNConc=0.005; RootNConc=0.009; BaseTemperature=1; OptimumTemperature=25; MaxTemperature=35; Tt_SowToEmergence=100; GSMax=0.008; R50=150; ConsiderWaterStress=true; Factor_XoBiomass=0.5; Factor_bBiomass=0.2; Factor_XoCover=0.4; Factor_bCover=0.2; Factor_XoHeight=0.7; Factor_bHeight=0.2
        zero: LegumeFactor, PlantingDepth, ExpectedYield, Tt_EstablishmentToHarvest, FieldLoss, ResidueRemoval, ResidueIncorporation, ResidueIncorporationDepth, Tt_EmergenceToMaturity
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