Simulations: Version=218
  Documentation
    # Using a table to define an Experiment

    This example will walk through the creation of experiments using an excel or csv file to define the permutations of an experiment. This example is useful for experiments where each permutation is fairly unique from each other, such as running the same simulation across multiple defined sites, or when you have only a subset of scenerios that would otherwise require running 100s of simulations to capture all the variations using a Permutation model.

    ## FactorFromFile

    {[FactorFromFile]}

    ## LimitedPermutation

    The LimitedPermutation example shows how to use FactorFromFile to build an experiment where there are multiple treatments of different types and numbers. In this case, we have 7 barley trials, with various cultivar and fertilisation rules, along with 2 canola trials and a Chickpea that should all run in the same year on the same paddock for comparision. While this could be done with a normal permutation, it would produce additional simulations that we don't need, and require complex manager scripts to handle all the options.

    With FactorFromFile, we can instead just define the changes we want for each of our simulations, and use basic manager scripts from the Management Toolbox to build our simulation. In the csv file we have nine modifications to the simulation, This includes setting the crop on the sowing, fertilisation and harvesting scripts, setting the cultivar to plant, the sowing date and properties and fertiliser amounts and topups.

    | Column                                    | Value Type | Description                    |
    |-------------------------------------------|------------|--------------------------------|
    | Scenario                                  | Text       | Name of the simulation         |
    | Crop                                      | Text       | Extra simulation descriptor    |
    | [Sow on a fixed date].Script.Crop         | Model      | Crop model to sow              |
    | [Fertilise at sowing].Script.Crop         | Model      | Crop model to fertilise        |
    | [Harvesting].Script.Crop                  | Model      | Crop model to harvest          |
    | [Sow on a fixed date].Script.CultivarName | Text       | Cultivar to sow                |
    | [Sow on a fixed date].Script.SowDate      | Date       | Date to sow                    |
    | [Sow on a fixed date].Script.SowingDepth  | Number     | Depth of sowing                |
    | [Sow on a fixed date].Script.Population   | Number     | Population of sowing           |
    | [Fertilise at sowing].Script.Amount       | Number     | Amount of fertiliser at sowing |
    | [Topup fertiliser].Script.Amount          | Number     | Amount of fertiliser at top up |

    In the case of the fertiliser changes, only three of the seven simulations have a value in those columns. When this is the case, that modification is ignored on any simulation that doesn't have a value, and whatever was defined in the simulation is used. If you instead want the value of something to be cleared (or made 'null'), then a value of *null* should be put into the table.

    The table also contains the **Scenario** column that defines what the composite factors should be called, and a **Crop** column to help with filtering. You can see in the interface the factors that have been created, and that they are set to read only to signify they were generated. It would be entirely possible to create these composite factors by manually, however imagine that this experiment had 50 or 100 variations to run, then it would take a long time.

    Down in the GrainWt graph we take advantage of the crop column to set the different crops as different colours. We also use a trick in our report to allow graphing of all the crops together like this. By writing *"([Barley].Grain.Wt + [Canola].Grain.Wt + [Chickpea].Grain.Wt) as Grain.Wt"* we can get the grain weight of any of our crop types, rather then needing to report each one and graph seperately.

    ## MultipleSites

    The MultipleSites example demostrates how this can be used to build a simulation where the same management rules are applied across different locations. In this example we have 3 sites, Dably, Kingaroy and Lincoln, which each have their own soil, weather and sowing dates, along with irrigation at Kingaroy. When writing a simulation with multiple sites, the most common differences will be different weather records, soils and management, which this example shows how to modify.

    | Column                                    | Value Type   | Description                              |
    |-------------------------------------------|--------------|------------------------------------------|
    | Site                                      | Text         | Name of the simulation                   |
    | [Soil]                                    | Model        | Soil model to replace Soil in simulation |
    | [Weather].FileName                        | Text         | Weather file to use                      |
    | [Sowing].Script.SowDate                   | Date         | Date to sow                              |
    | [Irrigate].Script.Dates                   | Date Array   | Dates to irrigate on                     |
    | [Irrigate].Script.Amounts                 | Number Array | How much to irrigate on each date        |
    | [Physical].Depth                          | Text Array   | Depth of each soil layer                 |
    | [Physical].BD                             | Number Array | Bulk Density of soil layers              |
    | [Physical].AirDry                         | Number Array | Air Dry of soil layers                   |
    | [Physical].LL15                           | Number Array | Lower Limit 15 of soil layers            |
    | [Physical].DUL                            | Number Array | Drained Upper Limit of soil layers       |
    | [Physical].SAT                            | Number Array | Saturation point soil layers             |
    | [Physical].SoilCrop.LL                    | Number Array | Crop Lower Limit of soil layers          |
    | [Water].Depth                             | Text Array   | Depth of each soil layer in water model  |
    | [Water].InitialValues                     | Number Array | Initial water in each soil layer         |

    The three variations are named under the **Site** column, and are Kingaroy, Dalby and Lincoln. We have two premade soils sitting in a folder under our FactorFromFile, these are used as a generic soil to set up most of the soil structure, which we further customise with other columns in our file. This is linked to each site using the **Soil** column, which contains a reference to the model it should copy into the simulation over the existing soil. In order to set the weather, we change the file that the Weather model points to with **[Weather].FileName**

    Since our Kingaroy site has irrigation, we need to pass in when those events occurred, along with how much water was put on. We do this with **[Irrigate].Script.Dates** and **[Irrigate].Script.Amounts** which are two properties on our irrigation manager script that takes in a set of dates and a set of amounts, seperated by commas. In the manager script, this then matches up each index of the arrays to each other, so it knows when and how much to put on for each event. For our other two sites, we just leave it blank so that no irrigation is applied.

    Lastly we want to futher customise our soil layers and characteristics, changing values in Physical and the initial water. To do this we have columns for all our Physical properties, along with changing the layer thicknesses (**[Physical].Depth**), and then also setting the initial water values with **[Water].InitialValues**. The order of these columns are also important, as since these column are after the **[Soil]**, they be applied to the soil we copied in from the folder. If you accidently put the columns the other way around, your changes would be overwritten by the soil replacement. If you want to fully create a soil for each of your sites, I would instead recommend making a soil for each variation and putting it under the soil folder and assigning them that way.

    While this seems a bit complicated, the goal of setting up an experiment like this is to stop duplication of manager scripts and model configuration between multiple simulations, which can lead to mistakes being made when trying to update values between multiple locations in a file.
  DataStore
  Experiment LimitedPermutation
    Factors
      FactorFromFile Scenario: FileName=ExperimentFromCSV-FactorialTrials.csv; NameColumn=Scenario
    Simulation SimulationA
      Clock: Start=2010-04-01; End=2012-04-01
      Weather: FileName=WeatherFiles/NZ_Lincoln.met
      Summary
      SoilArbitrator Soil Arbitrator
      Zone Field: Area=1; Slope=0; AspectAngle=0; Altitude=50
        MicroClimate: a_interception=0; b_interception=1; c_interception=0; d_interception=0; SoilHeatFluxFraction=0.4; MinimumHeightDiffForNewLayer=0; NightInterceptionFraction=0.5; ReferenceHeight=2
        Irrigation
        Fertiliser
        SurfaceOrganicMatter: InitialResidueName=grass; InitialResidueType=grass; InitialResidueMass=500; InitialStandingFraction=0; InitialCPR=0; InitialCNR=40
        Soil Clay Loam: SoilType=Loamy duplex; Latitude=-35; Longitude=140; YearOfSampling=0
          Physical
            Thickness  BD    AirDry  LL15   DUL   SAT
            100        1.35  0.04    0.08   0.2   0.460566
            300        1.37  0.106   0.133  0.26  0.453019
            300        1.38  0.156   0.156  0.3   0.449245
            300        1.38  0.156   0.156  0.3   0.449245
            BD, AirDry, LL15, DUL source: Estimated based on local knowledge
            SAT source: Calculated from measured, estimated or calculated BD
            SoilCrop barleySoil: LL=[0.08, 0.133, 0.156, 0.194]; KL=[0.06, 0.04, 0.04, 0.02]; XF=[1, 1, 0.8, 0.6]
              LL source: Estimated based on local knowledge
            SoilCrop canolaSoil: LL=[0.08, 0.133, 0.156, 0.194]; KL=[0.06, 0.04, 0.04, 0.02]; XF=[1, 1, 0.8, 0.6]
              LL source: Field measured and checked for sensibility
            SoilCrop chickpeaSoil: same as LimitedPermutation.SimulationA.Field.Clay Loam.Physical.canolaSoil
          WaterBalance SoilWater: SummerDate=1-Nov; SummerU=6; SummerCona=3.5; WinterDate=1-Apr; WinterU=2; WinterCona=2; DiffusConst=40; DiffusSlope=16; Salb=0.13; CN2Bare=73; CNRed=20; CNCov=0.8; DischargeWidth=0; CatchmentArea=0; PSIDul=-100; Thickness=[100, 300, 300, 300]; SWCON=[0.4, 0.4, 0.3, 0.3]
          Organic: FOMCNRatio=40; CarbonUnits=WalkleyBlack
            Thickness  Carbon  SoilCNRatio  FBiom  FInert  FOM
            100        1.3     12           0.03   0.4     610.101
            300        0.45    12           0.02   0.6     248.048
            300        0.45    12           0.02   0.6     100.849
            300        0.3     12           0.01   0.8     41.0021
          Chemical: PHUnits=Water
            Thickness  PH   EC
            100        5.7  0.1
            300        7.1  0.1
            300        8.4  0.3
            300        8.8  0.8
            EC, CL, PH source: Measured
          Nutrient
          Solute NO3: Thickness=[100, 300, 300, 300]; InitialValues=[43, 5, 2, 1.5]; InitialValuesUnits=ppm; WaterTableConcentration=0; D0=0; DepthConstant=0; MaxDepthSoluteAccessible=0; RunoffEffectivenessAtMovingSolute=0; MaxEffectiveRunoff=0
          Solute NH4: Thickness=[100, 300, 300, 300]; InitialValues=[0, 0, 0, 0]; InitialValuesUnits=ppm; WaterTableConcentration=0; D0=0; DepthConstant=0; MaxDepthSoluteAccessible=0; RunoffEffectivenessAtMovingSolute=0; MaxEffectiveRunoff=0
          Solute Urea: Thickness=[100, 300, 300, 300]; InitialValues=[0, 0, 0, 0]; InitialValuesUnits=kg/ha; WaterTableConcentration=0; D0=0; DepthConstant=0; MaxDepthSoluteAccessible=0; RunoffEffectivenessAtMovingSolute=0; MaxEffectiveRunoff=0
          Water: Thickness=[100, 300, 300, 300]; InitialValues=[0.08, 0.11, 0.156, 0.156]; FilledFromTop=false
          SoilTemperature Temperature: InteractionsPerDay=8
        Plant Barley
        Plant Canola
        Plant Chickpea
        Manager Sow on a fixed date
          Crop =
          SowDate = 3-jun
          CultivarName =
          SowingDepth = 50
          RowSpacing = 300
          Population = 100
```csharp
using APSIM.Shared.Utilities;
using Models.Utilities;
using Models.Soils;
using Models.PMF;
using Models.Core;
using System;
using System.Linq;

namespace Models
{
    [Serializable]
    public class Script : Model
    {
        [Link] Clock Clock;
        [Link] Fertiliser Fertiliser;
        [Link] Summary Summary;
        [Link] Soil Soil;
        
        [Description("Crop")]
        public IPlant Crop { get; set; }

        [Description("Sowing date (d-mmm)")]
        public string SowDate { get; set; }

        [Display(Type = DisplayType.CultivarName)]
        [Description("Cultivar to be sown")]
        public string CultivarName { get; set; }

        [Description("Sowing depth (mm)")]
        public double SowingDepth { get; set; }

        [Description("Row spacing (mm)")]
        public double RowSpacing { get; set; }

        [Description("Plant population (/m2)")]
        public double Population { get; set; }

        [EventSubscribe("DoManagement")]
        private void OnDoManagement(object sender, EventArgs e)
        {
            if (DateUtilities.WithinDates(SowDate, Clock.Today, SowDate))
            {
                Crop.Sow(population: Population, cultivar: CultivarName, depth: SowingDepth, rowSpacing: RowSpacing);    
            }
            else if (Crop.IsReadyForHarvesting)
            {
                Crop.Harvest();
                Crop.EndCrop();
            }
        }
    }
}
```
        Manager Fertilise at sowing
          Crop =
          FertiliserType = UreaGranular
          Amount = 60
```csharp
using Models.Soils;
using System;
using System.Linq;
using Models.Core;
using Models.PMF;
namespace Models
{
    [Serializable]
    public class Script : Model
    {
        [Link] Clock Clock;
        [Link] Fertiliser Fertiliser;
        
        [Description("Crop")]
        public IPlant Crop { get; set; }

        [Description("Type of fertiliser to apply? ")] 
        [Display(Type = DisplayType.FertiliserType)]public string FertiliserType { get; set; }
    
        [Description("Amount of fertiliser to be applied (kg/ha)")]
        public double Amount { get; set; }
        
        [EventSubscribe("Sowing")]
        private void OnSowing(object sender, EventArgs e)
        {
            Model crop = sender as Model;
            if (Crop != null && crop.Name.ToLower() == (Crop as IModel).Name.ToLower())
                Fertiliser.Apply(amount: Amount, type: FertiliserType);
        }
    }
}
```
        Manager Topup fertiliser
          FertiliserType = UreaGranular
          FertiliserDates = 11-aug
          FertiliseDepth = 0
          Amount = 100
          AmountType = False
```csharp
using Models.Soils;
using System;
using System.Linq;
using Models.Core;
using Models.PMF;
using APSIM.Shared.Utilities;
namespace Models
{
    [Serializable]
    public class Script : Model
    {
        [Link] Clock Clock;
        [Link] Fertiliser Fertiliser;
        
        [Separator("A component to apply fertiliser on one or more dates on every year of the simulation")]

        [Description("Type of fertiliser to apply? ")] 
        [Display(Type = DisplayType.FertiliserType)]public string FertiliserType { get; set; }

        [Description("Enter the fertilisation dates as dd-mmm with comma separation (any year information entered will be ignored): ")] 
        public string[] FertiliserDates { get; set; } 
        
        [Description("Fertilise depth (mm)")]
        public double FertiliseDepth { get; set; }

        [Description("Amount of fertiliser to be applied (kg/ha)")] 
        public double Amount { get; set; }

        [Description("Is the above amount to be applied each time? (yes/ticked)? Or is it the total annual amount across all dates (no/unticked)")] 
        public bool AmountType { get; set; }

        
        [EventSubscribe("DoManagement")]
        private void OnDoManagement(object sender, EventArgs e)
        {
            foreach (string ddMMM in FertiliserDates)
            {
                if (DateUtilities.DatesEqual(ddMMM, Clock.Today))
                {
                    if (AmountType)
                        Fertiliser.Apply(amount: Amount, type: FertiliserType);
                    else
                        Fertiliser.Apply(amount: Amount / FertiliserDates.Length, type: FertiliserType, depth: FertiliseDepth);
                }
            }
        }
    }
}
```
        Manager Harvesting
          Crop =
```csharp
using APSIM.Shared.Utilities;
using Models.Utilities;
using Models.Soils;
using Models.PMF;
using Models.Core;
using System;
using System.Linq;

namespace Models
{
    [Serializable] 
    public class Script : Model
    {
        [Description("Crop")]
        public IPlant Crop { get; set; }
        
        [EventSubscribe("DoManagement")]
        private void OnDoManagement(object sender, EventArgs e)
        {
            if (Crop.IsReadyForHarvesting)
            {
                Crop.Harvest();
                Crop.EndCrop();
            }
        }
    }
}
```
        Report: EventNames=[Clock].DoReport
          VariableNames:
            [Clock].Today
            ([Barley].Grain.Wt + [Canola].Grain.Wt + [Chickpea].Grain.Wt) as Grain.Wt
  Experiment MultipleSites
    Factors
      FactorFromFile Site: FileName=ExperimentFromCSV-FactorialSites.csv; NameColumn=Site
        Folder Soils
          Soil Sodosol: ASCOrder=Sodosol; SoilType=Other; Site=Southern GRDC region; State=Generic; Country=Australia; ApsoilNumber=1039-GENERIC; Latitude=-35.306914; Longitude=149.196236; LocationAccuracy=Regional soil type; YearOfSampling=0
            DataSource=Hochman, Z., Gobbett, D., Horan, H. and Navarro Garcia, J. (2015). Visualizing yield gaps in Australia’s wheat cropping zone. In proceedings of the 17th Australian Agronomy Conference, Wrest Point Convention Centre, Hobart, Tasmania. 20-24 September 2015.
            Comments:
              Sodosol - Typical Carcarosol - median values of all Calcarosols in APSoil as at 08/04/2013; This soil was created for the purpose of representing dominant soil types per weather station in Australia’s wheat zone. They were used to match the ASRIS maps with characterised soils. Typical soil profiles for each soil type were determined by finding the median values of the soil characterisation parameters of 434 deep soil profiles characterised in APSoil that had their Australian Soil Classification (ASC) identified;
              This soil is pinned to a location in the ACT (Canberra) only to allow viewing with Google Earth. This does not imply that this soil has been characterised at a particular location but is a generic set of values available for use in the Southern Cropping Region of Australia where a soil of this type is required for simulation.
            Physical
              Thickness  ParticleSizeSand  ParticleSizeSilt  ParticleSizeClay  Rocks  BD       AirDry     LL15       DUL       SAT
              150        5                 65                30                0      1.49617  0.0431667  0.0863333  0.214667  0.385409
              150        5                 65                30                0      1.53333  0.112      0.14       0.268333  0.371384
              300        5                 65                30                0      1.5      0.186      0.186      0.311333  0.383962
              300        5                 65                30                0      1.53667  0.186      0.186      0.303333  0.370126
              300        5                 65                30                0      1.56533  0.186      0.186      0.31      0.359308
              300        5                 65                30                0      1.55     0.186      0.186      0.3       0.365094
              300        5                 65                30                0      1.5      0.186      0.186      0.28      0.383962
              300        5                 65                30                0      1.5      0.186      0.186      0.26      0.383962
              300        5                 65                30                0      1.5      0.186      0.186      0.26      0.383962
              300        5                 65                30                0      1.4375   0.186      0.186      0.237     0.407547
              300        5                 65                30                0      1.4375   0.1815     0.1815     0.195167  0.407547
              300        5                 65                30                0      1.4      0.15       0.15       0.16      0.421698
              BD, AirDry, LL15, DUL source: Unknown source or quality of data
              SAT source: Calculated from measured, estimated or calculated BD
              Rocks, ParticleSizeSand, ParticleSizeSilt, ParticleSizeClay source: Calculated
              SoilCrop wheatSoil
                LL=[0.0863333, 0.14, 0.186, 0.243333, 0.266667, 0.2785, 0.28, 0.233333, 0.24, 0.2265, 0.1815, 0.15]
                KL=[0.06, 0.06, 0.06, 0.04, 0.04, 0.02, 0.01, 0.01, 0.01, 0.01, 0.01, 0.01]
                XF=[1, 1, 1, 1, 1, 1, 1, 1, 1, 1, 0, 0]
                LL source: Unknown source or quality of data
              SoilCrop SCRUMSoil: same as MultipleSites.Factors.Site.Soils.Sodosol.Physical.wheatSoil
            WaterBalance SoilWater: SummerDate=1-Nov; SummerU=6; SummerCona=2; WinterDate=1-Apr; WinterU=2; WinterCona=2.5; DiffusConst=88; DiffusSlope=35; Salb=0.13; CN2Bare=73; CNRed=20; CNCov=0.8; DischargeWidth=0; CatchmentArea=0; PSIDul=-100
              Thickness=[150, 150, 300, 300, 300, 300, 300, 300, 300, 300, 300, 300]
              SWCON=[0.7, 0.5, 0.5, 0.5, 0.5, 0.5, 0.5, 0.5, 0.5, 0.5, 0.5, 0.5]
            Organic: FOMCNRatio=40; CarbonUnits=WalkleyBlack
              Thickness  Carbon    SoilCNRatio  FBiom  FInert  FOM
              150        1         12           0.035  0.4     223.547
              150        0.5       12           0.02   0.5     195.05
              300        0.3       12           0.015  0.7     148.492
              300        0.18141   12           0.015  0.95    113.047
              300        0.117333  12           0.01   0.95    86.0626
              300        0.1       12           0.01   0.95    65.5195
              300        0.1       12           0.01   0.95    49.88
              300        0.1       12           0.01   0.95    37.9737
              300        0.1       12           0.01   0.95    28.9094
              300        0.1       12           0.01   0.95    22.0087
              300        0.1       12           0.01   0.95    16.7552
              300        0.1       12           0.01   0.95    12.7558
            Chemical: PHUnits=Water
              Thickness  PH       CEC
              150        6.51667  10.595
              150        7.6      9.47
              300        8.3      9.02
              300        8.65     8.75317
              300        8.8      8.609
              300        8.3      8.57
              300        7.4      8.57
              300        6.4      8.57
              300        6.4      8.57
              300        7        8.57
              300        6.55     8.57
              300        7.7      8.57
              CEC source: Calculated
              PH source: Estimated based on local knowledge
            Nutrient
            Solute NO3: InitialValues=[0, 0, 0, 0, 0, 0, 0, 0, 0, 0, 0, 0]; InitialValuesUnits=kg/ha; WaterTableConcentration=0; D0=0; DepthConstant=0; MaxDepthSoluteAccessible=0; RunoffEffectivenessAtMovingSolute=0; MaxEffectiveRunoff=0
              Thickness=[150, 150, 300, 300, 300, 300, 300, 300, 300, 300, 300, 300]
            Solute NH4: same as MultipleSites.Factors.Site.Soils.Sodosol.NO3
            Solute Urea: same as MultipleSites.Factors.Site.Soils.Sodosol.NO3
            Water: FilledFromTop=false
              Thickness=[150, 150, 300, 300, 300, 300, 300, 300, 300, 300, 300, 300]
              InitialValues=[0.214667, 0.268333, 0.311333, 0.303333, 0.31, 0.3, 0.28, 0.26, 0.26, 0.237, 0.195167, 0.16]
            SoilTemperature Temperature: InteractionsPerDay=8
          Soil Vertosol: ASCOrder=Vertosol; SoilType=Other; Site=Southern GRDC region; State=Generic; Country=Australia; ApsoilNumber=1043-GENERIC; Latitude=-35.306914; Longitude=149.196236; LocationAccuracy=Regional soil type; YearOfSampling=0
            DataSource=Hochman, Z., Gobbett, D., Horan, H. and Navarro Garcia, J. (2015). Visualizing yield gaps in Australia’s wheat cropping zone. In proceedings of the 17th Australian Agronomy Conference, Wrest Point Convention Centre, Hobart, Tasmania. 20-24 September 2015.
            Comments:
              Vertosol - Typical Carcarosol - median values of all Calcarosols in APSoil as at 08/04/2013; This soil was created for the purpose of representing dominant soil types per weather station in Australia’s wheat zone. They were used to match the ASRIS maps with characterised soils. Typical soil profiles for each soil type were determined by finding the median values of the soil characterisation parameters of 434 deep soil profiles characterised in APSoil that had their Australian Soil Classification (ASC) identified;
              This soil is pinned to a location in the ACT (Canberra) only to allow viewing with Google Earth. This does not imply that this soil has been characterised at a particular location but is a generic set of values available for use in the Southern Cropping Region of Australia where a soil of this type is required for simulation.
            Physical
              Thickness  ParticleSizeSand  ParticleSizeSilt  ParticleSizeClay  Rocks  BD       AirDry    LL15     DUL       SAT
              150        5                 65                30                0      1.29869  0.11      0.22     0.42      0.459928
              150        5                 65                30                0      1.304    0.190968  0.23871  0.42      0.457925
              300        5                 65                30                0      1.31     0.25      0.25     0.42      0.45566
              300        5                 65                30                0      1.345    0.25      0.25     0.409768  0.442453
              300        5                 65                30                0      1.37244  0.25      0.25     0.4       0.432097
              300        5                 65                30                0      1.381    0.25      0.25     0.3985    0.428868
              300        5                 65                30                0      1.375    0.25      0.25     0.398     0.431132
              300        5                 65                30                0      1.21     0.25      0.25     0.467     0.493396
              300        5                 65                30                0      1.32     0.25      0.25     0.365     0.451887
              300        5                 65                30                0      1.33     0.25      0.25     0.365     0.448113
              300        5                 65                30                0      1.3      0.25      0.25     0.445     0.459434
              BD, AirDry, LL15, DUL source: Unknown source or quality of data
              SAT source: Calculated from measured, estimated or calculated BD
              Rocks, ParticleSizeSand, ParticleSizeSilt, ParticleSizeClay source: Calculated
              SoilCrop wheatSoil
                LL=[0.22, 0.23871, 0.25, 0.279, 0.317383, 0.34155, 0.37, 0.45, 0.365, 0.365, 0.445]
                KL=[0.06, 0.06, 0.06, 0.04, 0.04, 0.02, 0.01, 0.01, 0.01, 0.01, 0.01]
                XF=[1, 1, 1, 1, 1, 1, 1, 1, 1, 1, 0]
                LL source: Unknown source or quality of data
              SoilCrop SCRUMSoil: same as MultipleSites.Factors.Site.Soils.Vertosol.Physical.wheatSoil
            WaterBalance SoilWater: SummerDate=1-Nov; SummerU=6; SummerCona=3.5; WinterDate=1-Apr; WinterU=2; WinterCona=2; DiffusConst=40; DiffusSlope=16; Salb=0.12; CN2Bare=73; CNRed=20; CNCov=0.8; DischargeWidth=0; CatchmentArea=0; PSIDul=-100; Thickness=[150, 150, 300, 300, 300, 300, 300, 300, 300, 300, 300]; SWCON=[0.3, 0.3, 0.3, 0.3, 0.3, 0.3, 0.3, 0.3, 0.3, 0.3, 0.3]
            Organic: FOMCNRatio=40; CarbonUnits=WalkleyBlack
              Thickness  Carbon    SoilCNRatio  FBiom  FInert  FOM
              150        0.915385  12           0.035  0.4     240.643
              150        0.776923  12           0.02   0.5     207.124
              300        0.425     12           0.015  0.7     153.441
              300        0.3       12           0.015  0.95    113.672
              300        0.2       12           0.01   0.95    84.2101
              300        0.123077  12           0.01   0.95    62.3844
              300        0.130769  12           0.01   0.95    46.2155
              300        0.1       12           0.01   0.95    34.2373
              300        0.1       12           0.01   0.95    25.3636
              300        0.09875   12           0.01   0.95    18.7898
              300        0.0825    12           0.01   0.95    13.9198
            Chemical: PHUnits=Water
              Thickness  PH    CEC
              150        8.2   10.4046
              150        8.5   10.0931
              300        8.6   9.30125
              300        8.6   9.02
              300        8     8.795
              300        7.5   8.62192
              300        8     8.63923
              300        8.2   8.57
              300        8.65  8.57
              300        8.6   8.56719
              300        8.8   8.530625
              CEC source: Calculated
              PH source: Estimated based on local knowledge
            Nutrient
            Solute NO3: Thickness=[150, 150, 300, 300, 300, 300, 300, 300, 300, 300, 300]; InitialValues=[0, 0, 0, 0, 0, 0, 0, 0, 0, 0, 0]; InitialValuesUnits=kg/ha; WaterTableConcentration=0; D0=0; DepthConstant=0; MaxDepthSoluteAccessible=0; RunoffEffectivenessAtMovingSolute=0; MaxEffectiveRunoff=0
            Solute NH4: same as MultipleSites.Factors.Site.Soils.Vertosol.NO3
            Solute Urea: same as MultipleSites.Factors.Site.Soils.Vertosol.NO3
            Water: Thickness=[150, 150, 300, 300, 300, 300, 300, 300, 300, 300, 300]; FilledFromTop=false
              InitialValues=[0.42, 0.42, 0.42, 0.409768, 0.4, 0.3985, 0.398, 0.467, 0.365, 0.365, 0.445]
            SoilTemperature Temperature: InteractionsPerDay=8
    Simulation SimulationB
      Clock: Start=2000-01-01; End=2000-12-31
      Summary
      Weather: FileName=WeatherFiles/AU_Dalby.met
      SoilArbitrator Soil Arbitrator
      Zone Field: Area=1; Slope=0; AspectAngle=0; Altitude=50
        MicroClimate: a_interception=0; b_interception=1; c_interception=0; d_interception=0; SoilHeatFluxFraction=0.4; MinimumHeightDiffForNewLayer=0; NightInterceptionFraction=0.5; ReferenceHeight=2
        Irrigation
        Fertiliser
        SurfaceOrganicMatter: InitialResidueName=grass; InitialResidueType=grass; InitialResidueMass=500; InitialStandingFraction=0; InitialCPR=0; InitialCNR=40
        Soil: SoilType=Generic medium texture; Region=Canterbury; Country=New Zealand; Latitude=0; Longitude=0
          Chemical: Thickness=[150, 150, 200, 250, 250, 500]; PH=[6, 6, 6, 6, 6, 6]; PHUnits=Water
          Physical
            Thickness  ParticleSizeClay  BD    AirDry  LL15  DUL   SAT   KS
            150        20                1.3   0.05    0.15  0.36  0.45  4500
            150        20                1.4   0.17    0.17  0.34  0.42  2500
            200        20                1.5   0.19    0.19  0.33  0.38  200
            250        15                1.6   0.17    0.17  0.3   0.36  1500
            250        10                1.45  0.1     0.1   0.2   0.38  5000
            500        10                1.35  0.1     0.1   0.2   0.39  10000
            SoilCrop WhiteCloverSoil: LL=[0.15, 0.17, 0.19, 0.17, 0.1, 0.1]; KL=[0.1, 0.08, 0.04, 0.01, 0, 0]; XF=[1, 1, 1, 1, 0, 0]
          WaterBalance SoilWater: SummerDate=21-Sep; SummerU=6; SummerCona=3.5; WinterDate=23-Mar; WinterU=6; WinterCona=2.5; DiffusConst=88; DiffusSlope=35; Salb=0.2; CN2Bare=0.7; CNRed=20; CNCov=0.8; PSIDul=-100; Thickness=[150, 150, 200, 250, 250, 500]; SWCON=[0.45, 0.35, 0.1, 0.15, 0.3, 0.2]
          Organic: FOMCNRatio=40; CarbonUnits=Total
            Thickness  Carbon  SoilCNRatio  FBiom  FInert  FOM
            150        2.5     12           0.04   0.4     358.617
            150        1.25    12           0.025  0.6     265.67
            200        0.5     12           0.015  0.8     178.084
            250        0.2     12           0.01   0.9     108.013
            250        0.15    12           0.008  0.95    65.5135
            500        0.1     12           0.008  0.98    24.1011
          Water: Thickness=[150, 150, 200, 250, 250, 500]; InitialValues=[0.339, 0.323, 0.316, 0.287, 0.19, 0.19]; FilledFromTop=false
          Nutrient
          Solute NO3: Thickness=[150, 150, 200, 250, 250, 500]; InitialValues=[9.43396, 6.59293, 3.6821, 2.19178, 2.19178, 0.740741]; InitialValuesUnits=ppm; WaterTableConcentration=0; D0=0; DepthConstant=0; MaxDepthSoluteAccessible=0; RunoffEffectivenessAtMovingSolute=0; MaxEffectiveRunoff=0
          Solute NH4: Thickness=[150, 150, 200, 250, 250, 500]; InitialValuesUnits=ppm; WaterTableConcentration=0; D0=0; DepthConstant=0; MaxDepthSoluteAccessible=0; RunoffEffectivenessAtMovingSolute=0; MaxEffectiveRunoff=0
            InitialValues=[0.377358, 0.240729, 0.113604, 0.0547945, 0.0547945, 0.0296296]
          Solute Urea: Thickness=[150, 150, 200, 250, 250, 500]; InitialValues=[0, 0, 0, 0, 0, 0]; InitialValuesUnits=kg/ha; WaterTableConcentration=0; D0=0; DepthConstant=0; MaxDepthSoluteAccessible=0; RunoffEffectivenessAtMovingSolute=0; MaxEffectiveRunoff=0
          SoilTemperature Temperature: InteractionsPerDay=8
        Plant Wheat
        Manager Sowing
          Crop = [Wheat]
          SowDate =
          CultivarName = Hartog
          SowingDepth = 50
          RowSpacing = 250
          Population = 120
```csharp
using APSIM.Shared.Utilities;
using Models.Utilities;
using Models.Soils;
using Models.PMF;
using Models.Core;
using System;
using System.Linq;

namespace Models
{
    [Serializable]
    public class Script : Model
    {
        [Link] Clock Clock;
        [Link] Summary Summary;
        [Link] Soil Soil;
        
        [Description("Crop")]
        public IPlant Crop { get; set; }

        [Description("Sowing date (d-mmm)")]
        public string SowDate { get; set; }

        [Display(Type = DisplayType.CultivarName)]
        [Description("Cultivar to be sown")]
        public string CultivarName { get; set; }

        [Description("Sowing depth (mm)")]
        public double SowingDepth { get; set; }

        [Description("Row spacing (mm)")]
        public double RowSpacing { get; set; }

        [Description("Plant population (/m2)")]
        public double Population { get; set; }

        [EventSubscribe("DoManagement")]
        private void OnDoManagement(object sender, EventArgs e)
        {
            if (DateUtilities.WithinDates(SowDate, Clock.Today, SowDate))
            {
                Crop.Sow(population: Population, cultivar: CultivarName, depth: SowingDepth, rowSpacing: RowSpacing);    
            }
            else if (Crop.IsReadyForHarvesting)
            {
                Crop.Harvest();
                Crop.EndCrop();
            }
        }
    }
}
```
        Manager Irrigate
          Dates =
          Amounts =
          Depth = 0
          Efficiency = 1
          WillRunoff = False
```csharp
using APSIM.Shared.Utilities;
using Models.Utilities;
using Models.Soils;
using Models.PMF;
using Models.Core;
using System;
using System.Linq;

namespace Models
{
    [Serializable] 
    public class Script : Model
    {
        [Link] Clock Clock;
        [Link] Irrigation Irrigation;
    
        [Description("Dates to Irrigate on")]
        public string[] Dates { get; set; }
        
        [Description("Amount to Irrigate on each Date")]
        public double[] Amounts { get; set; }
        
        [Description("Depth in the soil to apply the  irrigation (mm)")] 
        public double Depth { get; set; }
        
        [Description("Efficiency of irrigation (0-1)")] 
        public double Efficiency { get; set; }
        
        [Description("Will the irrigation runoff?")] 
        public bool WillRunoff { get; set; }
        
        [EventSubscribe("DoManagement")]
        private void OnDoManagement(object sender, EventArgs e)
        {
            if (Dates != null && Amounts != null)
            {
                for(int i = 0; i < Dates.Length; i++)
                {
                    if (DateUtilities.DatesAreEqual(Dates[i], Clock.Today))
                        Irrigation.Apply(amount: Amounts[i], depth: Depth, efficiency: Efficiency, willRunoff: WillRunoff);
                }
            }
        }
    }
}
```
        Manager Harvesting
          Crop = [Wheat]
          script: same as in LimitedPermutation.SimulationA.Field.Harvesting
        Report: EventNames=[Clock].DoReport
          VariableNames:
            [Clock].Today
            [Wheat].AboveGround.Wt
            [Wheat].Leaf.LAI
            [Wheat].Grain.Number
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