Simulations: Version=57
  Memo Title page
    # APSIM Fodder Beet Model

    Khaembah E.N., Brown H.E., Zyskowski R., Chakwizira E., de Ruiter J.M., Teixeira E.I.

    The New Zealand Institute for Plant & Food Research Limited
    Private Bag 4704, Christchurch, New Zealand

    The APSIM Fodder Beet Model has been developed using the Plant Modelling Framework (PMF) of [brown_plant_2014]. This framework provides a library of plant organ and process submodels that can be coupled, at runtime, to construct a model in much the same way that models can be coupled to construct a simulation. This means that dynamic composition of lower level process and organ classes (e.g. photosynthesis, leaf) into larger constructions (e.g. maize, barley, sorghum) can be achieved by the model developer without additional coding.

    The model consists of:

    * A phenology model to simulate development between growth phases
    * A structure model to simulate plant morphology
    * A collection of organs to simulate the various plant parts
    * An arbitrator to allocate resources (N, biomass) to various plant organs.
  Replacements
    Plant FodderBeet: CropType=FodderBeet; IsEnding=false; DaysAfterEnding=0
      OrganArbitrator Arbitrator
        Memo
          The partitioning of biomass to fodder beet organs follows a "Relative Allocation" routine (see Arbitrator module documentation) guided by coefficients derived from the October sowing date data of the test dataset
        PriorityAllocation NArbitrator
        PriorityAllocation DMArbitrator
      Phenology
        Memo
          The fodder beet model is described for growth and dry matter production using solar radiation and temperature
          as driving functions. The effect of temperature is quantified using a thermal-time accumulation function.
          Thermal-time is calculated in degree days for ambient temperature above a base temperature (Tbase). Tbase is
          assumed to be 0°C ([Chakwizira_etal_2016a]).
        MultiplyFunction ThermalTime
          PhaseLookup
            PhaseLookupValue SoilTemperature: Start=Sowing; End=Germination
              SoilTemperatureFunction ThermalTime: maxt_soil_surface=20; mint_soil_surface=10
                XYPairs: X=[0, 25, 30, 45]; Y=[0, 25, 25, 0]
              Memo
                The effect of soil temperature can go beyond germination as has been demonstrated in previous studies
                ([Stone_etal_1998]).
            PhaseLookupValue AirTemperature: Start=Germination; End=Maturity
              AirTemperatureFunction ThermalTime
                XYPairs: X=[0, 25, 30, 45]; Y=[0, 25, 25, 0]
              Memo
                Temperature is extrapolated to 3-hourly values from daily maximum and minimum using a sinusoidal function, and thermal-time accumulation is calculated for each period and combined to give daily values ([Jones_etal_1986]). The optimum temperature was set at 25–30°C with a maximum of 45°C, targets assumed similar to those of sugar beet reported by ([Ober_Rajabi_2010]) and ([Sanghera_etal_2016]).
          AddFunction DroughtPhenologyAcelleration
            Constant One: FixedValue=1
            MultiplyFunction Stress
              Constant StressResponseCoefficient: FixedValue=2
              LinearInterpolationFunction StressFactor: XProperty=[FodderBeet].Leaf.Fw
                XYPairs: X=[0, 1]; Y=[0, 0]
        GerminatingPhase Planted: Start=Sowing; End=Germination
        EmergingPhase Germinating: ShootLag=0; ShootRate=12.5; Start=Germination; End=PreEmerge; TTForTimeStep=0
          VariableReference ThermalTime: VariableName=[Phenology].ThermalTime.Value()
          Memo
            This is an empirical fit where 12.5°Cd per mm sowing depth is assumed based on the 2014 sowing date trial results ([Khaembah_etal_2017]).
        GenericPhase Emerging: Start=PreEmerge; End=Established
          Constant Target: FixedValue=400; Units=oCd
          VariableReference Progression: VariableName=[Phenology].ThermalTime.Value()
          Memo
            This an empirical fit of 400°Cd estimated from the October data of the 2014 sowing date trial ([Khaembah_etal_2017]).
        GenericPhase Vegetative: Start=Established; End=InitRepro
          VariableReference Progression: VariableName=[Phenology].ThermalTime.Value()
          MultiplyFunction Target
            LinearInterpolationFunction PhotoPeriodResponse: XProperty=[Phenology].Photoperiod.Value()
              XYPairs: X=[13, 16]; Y=[1, 1]
            Constant MaxThermalTimeToBolt: FixedValue=2700; Units=oCd
            Memo
              The effect of photoperiod on the vegetative phase is assumed neglible. The maximum TT of 3200°Cd based on the 2014 October sowing date data([Khaembah_etal_2017]) is used here.
        GenericPhase EarlyReproductive: Start=InitRepro; End=PreBolt
          Constant Target: FixedValue=1; Units=oCd
          Memo
            This an empirical fit - 400°Cd estimated from the 2014 sowing date trial ([Khaembah_etal_2017]).
          LinearInterpolationFunction Progression: XProperty=[Phenology].Photoperiod.Value()
            XYPairs: X=[13, 14]; Y=[0, 1]
        GenericPhase Bolt: Start=PreBolt; End=StartBolt
          VariableReference Progression: VariableName=[Phenology].ThermalTime.Value()
          Constant Target: FixedValue=800
          Memo
            The 800°Cd is is an empirical fit based on the 2014 sowing date trial ([Khaembah_etal_2017]).
        EndPhase Maturity: Start=Bolting; End=Maturity
          Constant Target: FixedValue=15000
          VariableReference ThermalTime: VariableName=[Phenology].ThermalTime.Value()
          Memo
            This is estimated to be 3600°Cd
            A value of 3600°Cd (i.e. sum of °Cd from crop emergence to the end of the vegetative phase) is assumed for the duration of the “Maturity” phase. Accumulated thermal time (TTsum) for each phase (planted–vegetative) was empirically derived from the 2014 sowing date data ([Khaembah_etal_2017]).
        AccumulateFunction AccumulatedThermalTime: StartStageName=PreEmerge; EndStageName=Maturity; FractionRemovedOnCut=0; FractionRemovedOnHarvest=0; FractionRemovedOnGraze=0; FractionRemovedOnPrune=0
          VariableReference: VariableName=[Phenology].ThermalTime.Value()
        PhotoperiodFunction Photoperiod: Twilight=-6; DayLength=0
      Structure: CohortInitialisationStage=Germination; LeafInitialisationStage=PreEmerge
        VariableReference ThermalTime: VariableName=[Phenology].ThermalTime.Value()
        LinearInterpolationFunction HeightModel: XProperty=[Structure].LeafTipsAppeared
          XYPairs: X=[0, 24]; Y=[20, 500]
          Memo
            The maximum height of 500 mm was estimated from the 2014 sowing date trial ([Khaembah_etal_2017]).
        PhaseLookupValue MainStemPrimordiaInitiationRate: Start=PreEmerge; End=Maturity
          DivideFunction NodeInitiationRateFunction
            VariableReference Phyllochron: VariableName=[Structure].Phyllochron.Phyllochron.Value()
            Constant PrimordiaPerMainstemNode: FixedValue=2
          Memo
            Assumes that leaf primordia is produced at two times faster than the leaves (i.e. half of phyllochron values) following findings for other species such as maize ([Padilla_and_Otegui_2005]).
        PhaseLookupValue Phyllochron: Start=PreEmerge; End=Maturity
          LinearInterpolationFunction Phyllochron: XProperty=[FodderBeet].Structure.LeafTipsAppeared
            XYPairs: X=[1, 3, 3.1]; Y=[100, 100, 50]
          Memo
            A two stage phyllochron (i.e. 100–50°Cd) is an empirical fit to get faster leaf appearance of the first 3 leaves. The
            50°Cd for the fourth and later-formed leaves is estimated from measured values of the 2014-2015 October sowing date treatment ([Khaembah_etal_2017]).
        Constant FinalLeafNumber: FixedValue=80
        Constant DroughtInducedBranchMortality: FixedValue=0
        Constant BranchingRate: FixedValue=0
        Constant BranchMortality: FixedValue=0
        Constant StemSenescenceAge: FixedValue=0
      GenericOrgan StorageRoot
        Constant SenescenceRate: FixedValue=0; Units=/d
        Constant MaximumNConc: FixedValue=0.02
        Constant MinimumNConc: FixedValue=0.005
        Constant NReallocationFactor: FixedValue=0.05
        PhaseBasedSwitch NitrogenDemandSwitch: Start=Germination; End=Maturity
        Constant NRetranslocationFactor: FixedValue=0.05
        Constant DMRetranslocationFactor: FixedValue=0
        Constant DMSinkCapacity: FixedValue=1
        Constant InitialWtFunction: FixedValue=0; Units=g/m^2
        Constant DetachmentRateFunction: FixedValue=0; Units=/d
        Constant MaintenanceRespirationFunction: FixedValue=0; Units=0-1
        Constant DMConversionEfficiency: FixedValue=1; Units=0-1
        BiomassRemoval BiomassRemovalDefaults
          OrganBiomassRemovalType Harvest: FractionLiveToRemove=0.95; FractionDeadToRemove=0; FractionLiveToResidue=0.05; FractionDeadToResidue=100
          OrganBiomassRemovalType Cut: FractionLiveToRemove=0; FractionDeadToRemove=0; FractionLiveToResidue=0; FractionDeadToResidue=0
          OrganBiomassRemovalType Prune: FractionLiveToRemove=0; FractionDeadToRemove=0; FractionLiveToResidue=0; FractionDeadToResidue=0
          OrganBiomassRemovalType Graze: FractionLiveToRemove=0.95; FractionDeadToRemove=0; FractionLiveToResidue=0.05; FractionDeadToResidue=1
          VariableReference CriticalNConc: VariableName=[StorageRoot].MinimumNConc.Value()
        Constant DMReallocationFactor: FixedValue=0.8
        VariableReference CriticalNConc: VariableName=[StorageRoot].MinimumNConc.Value()
        Constant RemobilisationCost: FixedValue=0
        Constant CarbonConcentration: FixedValue=0.4
        BiomassDemand DMDemands
          MultiplyFunction Structural
            PartitionFractionDemandFunction DMDemandFunction
              PhaseLookup PartitionFraction
                PhaseLookupValue NonReproductive: Start=PreEmerge; End=InitRepro
                  LinearInterpolationFunction PartitionFraction: XProperty=[Structure].LeafTipsAppeared
                    XYPairs: X=[1, 6, 17, 20, 25]; Y=[0, 0, 0, 0.7, 0.8]
                    Memo
                      Allocation determined by node number - partitioning coefficients have been determined using the 2014 sowing date October data ([Khaembah_etal_2017]).
                PhaseLookupValue Reproductive: Start=InitRepro; End=Maturity
                  Constant InitialWtFunction: FixedValue=0; Units=g/m^2
            Constant StructuralFraction: FixedValue=0.4
          MultiplyFunction Storage
            SubtractFunction StorageFraction
              Constant One: FixedValue=1
              VariableReference metabolicFraction: VariableName=[StorageRoot].DMDemands.Metabolic.MetabolicFraction.Value()
              VariableReference StructuralFraction
                VariableName=[StorageRoot].DMDemands.Structural.StructuralFraction.Value()
            VariableReference DMDemandFraction: VariableName=[StorageRoot].DMDemands.Structural.DMDemandFunction.Value()
            Constant MetabolicFraction: FixedValue=0.45
          MultiplyFunction Metabolic
            Constant MetabolicFraction: FixedValue=0.55
            VariableReference DMDemandFraction: VariableName=[StorageRoot].DMDemands.Structural.DMDemandFunction.Value()
        BiomassDemand NDemands
          MultiplyFunction Structural
            VariableReference MinNconc: VariableName=[StorageRoot].minimumNconc.Value()
            VariableReference PotentialDMAllocation: VariableName=[StorageRoot].potentialDMAllocation.Structural
          MultiplyFunction Metabolic
            SubtractFunction MetabolicNconc
              VariableReference MaxNconc: VariableName=[StorageRoot].maximumNconc.Value()
              Constant Zero: FixedValue=0
            VariableReference PotentialDMAllocation: VariableName=[StorageRoot].potentialDMAllocation.Structural
          StorageNDemandFunction Storage
            VariableReference NitrogenDemandSwitch: VariableName=[StorageRoot].nitrogenDemandSwitch.Value()
            VariableReference MaxNconc: VariableName=[StorageRoot].maximumNconc.Value()
        RetranslocateNonStructural RetranslocateNitrogen
      Leaf: MaxCover=1; Albedo=0.2; Gsmax350=0.015; R50=150; MicroClimatePresent=true; KDead=0.2
        zero: CurrentExpandingLeaf, StartFractionExpanded, FractionNextleafExpanded, DeadNodesYesterday, GrowthRespiration, FRGR, PotentialEP, WaterDemand, MaximumMainStemLeafNumber, TipsAtEmergence, CohortsAtInitialisation, FractionDied
        LeafCohort InitialLeaves[1]: Rank=1; Area=50
          zero: NReallocationFactor, DMReallocationFactor, NRetranslocationFactor, DMRetranslocationFactor, ShadeInducedSenRate, SenescedFrac, DeltaPotentialArea, DeltaStressConstrainedArea, DeltaCarbonConstrainedArea, PotentialStructuralDMAllocation, PotentialMetabolicDMAllocation, MetabolicNReallocated, MetabolicWtReallocated, StorageNReallocated, StorageWtReallocated, MetabolicNRetranslocated, StorageNRetrasnlocated, DMRetranslocated, MetabolicNAllocation, StructuralDMAllocation, MetabolicDMAllocation, MaintenanceRespiration
        CompositeBiomass Total: Propertys=[[Leaf].Live, [Leaf].Dead]; DMDOfStructural=0.6
        VariableReference ThermalTime: VariableName=[Phenology].ThermalTime.Value()
        RUEModel Photosynthesis
          Constant RUE: FixedValue=1.8
          Constant FNconst: FixedValue=1
          Constant FVPD: FixedValue=1
          LinearInterpolationFunction FW: XProperty=[Leaf].Fw
            XYPairs: X=[0, 0.5, 1]; Y=[0, 1, 1]
          WeightedTemperatureFunction FT: MaximumTemperatureWeighting=0.75
            XYPairs: X=[0, 18, 26, 45]; Y=[0.1, 1, 1, 0.1]
          RUECO2Function FCO2: PhotosyntheticPathway=C3
          VariableReference RadnInt: VariableName=[Leaf].RadIntTot
          LinearInterpolationFunction FN: XProperty=[Leaf].Fn
            XYPairs: X=[0, 1, 1.5]; Y=[0, 1, 1]
        MultiplyFunction ExtinctionCoeff
          Constant PotentialExtinctionCoeff: FixedValue=0.74
            Memo
              The extinction coefficient value of 0.74 ([Chakwizira_etal_2016a]) was used.
          LinearInterpolationFunction WaterStress: XProperty=[FodderBeet].Leaf.Fw
            XYPairs: X=[0, 1]; Y=[1, 1]
        LeafCohortParameters CohortParameters: ExpansionStressValue=0
          Constant SenessingLeafRelativeSize: FixedValue=1; Units=0-1
          LinearInterpolationFunction MaxAreaPlateau: XProperty=[Structure].LeafTipsAppeared
            Memo
              Data of expansion of  laminae at three leaf positions (12th, 16th and 20th) on six plants  from the sowing date  experiment were used to give indication of ontogenic increase in maximum leaf area. The pattern of maximum leaf area for sugar beet ([Milford_etal_1985]) was assumed.
            XYPairs: X=[1, 6, 11, 15, 21, 35, 45, 50]; Y=[8000, 10000, 40000, 50000, 50000, 50000, 50000, 50000]
          MultiplyFunction MaxArea
            Constant AreaLargestLeaf: FixedValue=30000; Units=mm^2
            LinearInterpolationFunction AgeFactor: XProperty=[Structure].LeafTipsAppeared
              XYPairs: X=[1, 6, 11, 15, 21, 35, 45, 50]; Y=[0.16, 0.2, 0.8, 1, 1, 0.6, 0.4, 0.3]
            Memo
              The pattern is assumed to be similar to that of maize ([Teixeira_etal_2011]).
          LinearInterpolationFunction GrowthDuration: XProperty=[Structure].LeafTipsAppeared
            XYPairs: X=[1, 6, 11, 15, 21, 35, 45, 50]; Y=[200, 300, 500, 500, 500, 500, 500, 500]
            Memo
              The pattern is assumed to be similar to that of maize ([Teixeira_etal_2011]).
          MultiplyFunction LagDuration
            LinearInterpolationFunction PhotoperiodMultiplier: XProperty=[Phenology].Photoperiod.Value()
              XYPairs: X=[1, 10, 13, 24]; Y=[1, 1, 1, 1]
            Memo
              The pattern is assumed to be similar to that of maize ([Teixeira_etal_2011]).
            LinearInterpolationFunction LagDurationBase: XProperty=[Structure].LeafTipsAppeared
              XYPairs: X=[1, 6, 11]; Y=[100, 300, 300]
          MultiplyFunction SenescenceDuration
            LinearInterpolationFunction PhotoperiodMultiplier: XProperty=[Phenology].Photoperiod.Value()
              XYPairs: X=[1, 10, 13, 24]; Y=[1, 1, 1, 1]
            Constant BaseValue: FixedValue=1200; Units=oCd
          Constant DetachmentLagDuration: FixedValue=1000000
          Constant DetachmentDuration: FixedValue=1
          Constant StructuralFraction: FixedValue=0.5
          Constant SpecificLeafAreaMin: FixedValue=10000
          Constant SpecificLeafAreaMax: FixedValue=16000
            Memo
              Maximum leaf specific leaf area was estimated from the 2014 sowing date trial ([Khaembah_etal_2017]).
          LinearInterpolationFunction ExpansionStress: XProperty=[FodderBeet].Leaf.Fw
            XYPairs: X=[0.5, 1]; Y=[0, 1]
          Constant MinimumNConc: FixedValue=0.025
            Memo
              The minimum, maximum and critical nitrogen concentration were determined in a previous study ([Chakwizira_etal_2016b]).
          Constant CriticalNConc: FixedValue=0.025
          Constant MaximumNConc: FixedValue=0.04
          Constant NReallocationFactor: FixedValue=0.95
          Constant NRetranslocationFactor: FixedValue=0
          Constant DMRetranslocationFactor: FixedValue=0
          Constant DMReallocationFactor: FixedValue=0.95
          Constant StorageFraction: FixedValue=0.05
          LinearInterpolationFunction ShadeInducedSenescenceRate: XProperty=[Leaf].CohortCurrentRankCoverAbove
            XYPairs: X=[0, 0.5, 0.95, 1]; Y=[0, 0, 0, 0.1]
          Constant InitialNConc: FixedValue=0
          Constant LeafSizeShapeParameter: FixedValue=0.01
          Constant MaintenanceRespirationFunction: FixedValue=0
          Constant CellDivisionStress: FixedValue=1; Units=0-1
          AddFunction DroughtInducedLagAcceleration
            Constant One: FixedValue=1
            MultiplyFunction Stress
              Constant StressResponseCoefficient: FixedValue=1
              LinearInterpolationFunction StressFactor: XProperty=[FodderBeet].Leaf.Fw
                XYPairs: X=[0, 0.5]; Y=[0.5, 0]
          AddFunction DroughtInducedSenAcceleration: same as Replacements.FodderBeet.Leaf.CohortParameters.DroughtInducedLagAcceleration
          ArrayFunction LagDurationAgeMultiplier: Values=1 1 1
          ArrayFunction SenescenceDurationAgeMultiplier: Values=1 1 1
          ArrayFunction LeafSizeAgeMultiplier: Values=1 1 1 1 1 1 1 1 1 1 1 1
          Constant RemobilisationCost: FixedValue=0
          Constant CarbonConcentration: FixedValue=0.4
        MinimumFunction FRGRFunction
          VariableReference RUE_FT: VariableName=[Leaf].Photosynthesis.FT.Value()
          MinimumFunction Others
            VariableReference RUE_FN: VariableName=[Leaf].Photosynthesis.FN.Value()
            VariableReference RUE_FVPD: VariableName=[Leaf].Photosynthesis.FVPD.Value()
        BiomassRemoval BiomassRemovalDefaults
          OrganBiomassRemovalType Harvest: FractionLiveToRemove=0; FractionDeadToRemove=0; FractionLiveToResidue=100; FractionDeadToResidue=100
          OrganBiomassRemovalType Cut: FractionLiveToRemove=0.8; FractionDeadToRemove=0; FractionLiveToResidue=0; FractionDeadToResidue=0
          OrganBiomassRemovalType Prune: FractionLiveToRemove=0; FractionDeadToRemove=0; FractionLiveToResidue=0.6; FractionDeadToResidue=0
          OrganBiomassRemovalType Graze: FractionLiveToRemove=0.95; FractionDeadToRemove=0.95; FractionLiveToResidue=0.05; FractionDeadToResidue=0.05
        Constant StructuralFraction: FixedValue=0.5
        Constant DMConversionEfficiency: FixedValue=1
        Constant RemobilisationCost: FixedValue=0
        Constant CarbonConcentration: FixedValue=0.4
        Constant FrostFraction: FixedValue=0
        ExpressionFunction CO2internal: Expression=(163 - [IWeather].MeanT)/(5 - 0.1*[IWeather].MeanT)
        DivideFunction StomatalConductanceCO2Modifier
          VariableReference FCO2: VariableName=[Leaf].Photosynthesis.FCO2.Value()
          ExpressionFunction RelativeCO2Gradient
            Expression=([IWeather].CO2 - [Leaf].CO2internal.Value())/(350 - [Leaf].CO2internal.Value())
      GenericOrgan Petiole
        Constant MaximumNConc: FixedValue=0.02
        Constant MinimumNConc: FixedValue=0.015
        PhaseBasedSwitch NitrogenDemandSwitch: Start=Germination; End=Maturity
        Constant NRetranslocationFactor: FixedValue=0
        Constant DMRetranslocationFactor: FixedValue=0
        MaximumFunction SenescenceRate
          VariableReference SenescenceRate: VariableName=[Leaf].FractionDied
          Constant Zero: FixedValue=0
        Constant DMReallocationFactor: FixedValue=0.8
        Constant NReallocationFactor: FixedValue=0.94
        Constant InitialWtFunction: FixedValue=0; Units=g/m^2
        Constant DetachmentRateFunction: FixedValue=0; Units=/d
        Constant MaintenanceRespirationFunction: FixedValue=0; Units=0-1
        Constant DMConversionEfficiency: FixedValue=1; Units=0-1
        BiomassRemoval BiomassRemovalDefaults
          OrganBiomassRemovalType Harvest: FractionLiveToRemove=0; FractionDeadToRemove=0; FractionLiveToResidue=1; FractionDeadToResidue=1
          OrganBiomassRemovalType Cut: FractionLiveToRemove=0.8; FractionDeadToRemove=0; FractionLiveToResidue=0; FractionDeadToResidue=0
          OrganBiomassRemovalType Prune: FractionLiveToRemove=0; FractionDeadToRemove=0; FractionLiveToResidue=0.6; FractionDeadToResidue=0
          OrganBiomassRemovalType Graze: FractionLiveToRemove=0.95; FractionDeadToRemove=0.95; FractionLiveToResidue=0.05; FractionDeadToResidue=0.05
        VariableReference CriticalNConc: VariableName=[Petiole].MinimumNConc.Value()
        Constant RemobilisationCost: FixedValue=0
        Constant CarbonConcentration: FixedValue=0.4
        BiomassDemand DMDemands
          MultiplyFunction Structural
            MaximumFunction DMDemandFunction
              Constant MinDemand: FixedValue=0
              MultiplyFunction PotentialDemand
                Constant Ratio: FixedValue=1.2
                SubtractFunction
                  VariableReference leafwt: VariableName=[FodderBeet].Leaf.Live.Wt
                  VariableReference Petiolewt: VariableName=[FodderBeet].Petiole.Wt
            Constant StructuralFraction: FixedValue=0.5
          Constant Metabolic: FixedValue=0
          MultiplyFunction Storage
            VariableReference DMDemandFunction1: VariableName=[Petiole].DMDemands.Structural.DMDemandFunction.Value()
            SubtractFunction StorageFraction
              Constant One: FixedValue=1
              VariableReference StructuralFraction: VariableName=[Petiole].DMDemands.Structural.StructuralFraction.Value()
        BiomassDemand NDemands
          MultiplyFunction Structural
            VariableReference MinNconc: VariableName=[Petiole].minimumNconc.Value()
            VariableReference PotentialDMAllocation: VariableName=[Petiole].potentialDMAllocation.Structural
          MultiplyFunction Metabolic
            SubtractFunction MetabolicNconc
              VariableReference CritNconc: VariableName=[Petiole].criticalNConc.Value()
              VariableReference MinNconc: VariableName=[Petiole].minimumNconc.Value()
            VariableReference PotentialDMAllocation: VariableName=[Petiole].potentialDMAllocation.Structural
          StorageNDemandFunction Storage
            VariableReference NitrogenDemandSwitch: VariableName=[Petiole].nitrogenDemandSwitch.Value()
            VariableReference MaxNconc: VariableName=[Petiole].maximumNconc.Value()
        RetranslocateNonStructural RetranslocateNitrogen
      Root: GrowthRespiration=0; MaintenanceRespiration=0; RootAngle=45; SWAvailabilityRatio=0
        LinearInterpolationFunction KLModifier: XProperty=[Root].LengthDensity
          XYPairs: X=[0, 1]; Y=[1, 1]
        Constant SoilWaterEffect: FixedValue=1
        Constant MaximumRootDepth: FixedValue=1500
        PhaseLookup RootFrontVelocity
          PhaseLookupValue: Start=Germination; End=Maturity
            Constant: FixedValue=10
        Constant MaximumNConc: FixedValue=0.01
        Constant MinimumNConc: FixedValue=0.005
        PhaseBasedSwitch NitrogenDemandSwitch: Start=PreEmerge; End=Maturity
        LinearInterpolationFunction SenescenceRate: XProperty=[Leaf].FractionDied
          XYPairs: X=[0, 1]; Y=[0, 0.001]
        BiomassRemoval BiomassRemovalDefaults
          OrganBiomassRemovalType Harvest: FractionLiveToRemove=0.5; FractionDeadToRemove=0; FractionLiveToResidue=0.1; FractionDeadToResidue=0
          OrganBiomassRemovalType Cut: FractionLiveToRemove=0.8; FractionDeadToRemove=0; FractionLiveToResidue=0; FractionDeadToResidue=0
          OrganBiomassRemovalType Prune: FractionLiveToRemove=0; FractionDeadToRemove=0; FractionLiveToResidue=0.6; FractionDeadToResidue=0
          OrganBiomassRemovalType Graze: FractionLiveToRemove=0.6; FractionDeadToRemove=0; FractionLiveToResidue=0.2; FractionDeadToResidue=0
        Constant KNO3: FixedValue=0.02; Units=g/plant
        Constant KNH4: FixedValue=0.01; Units=g/plant
        LinearInterpolationFunction NUptakeSWFactor: XProperty=[Root].RWC
          XYPairs: X=[0, 1]; Y=[0, 1]
        Constant InitialDM: FixedValue=5; Units=g/plant
        Constant SpecificRootLength: FixedValue=40; Units=m/g
        LinearInterpolationFunction MaxDailyNUptake: XProperty=[Root].Depth
          XYPairs: X=[0, 100, 150]; Y=[0.1, 1, 6]
          Memo
            Early growth N uptake is assumed to be 0.1 kg N/ha/day, and this increases with root growth reaching a maximumof 5.8 kg N/ha/day. The maximum N uptake per day is assumed from sugar beet data (Armstrong et al., 1986).
        Constant DMConversionEfficiency: FixedValue=1
        Constant MaintenanceRespirationFunction: FixedValue=1
        Constant RemobilisationCost: FixedValue=0
        Constant CarbonConcentration: FixedValue=0.4
        BiomassDemand DMDemands
          MultiplyFunction Structural
            PartitionFractionDemandFunction DMDemandFunction
              LinearInterpolationFunction PartitionFraction: XProperty=[Root].Depth
                XYPairs: X=[0, 1200, 2000]; Y=[0.05, 0, 0]
                Memo
                  The roots were assumed to account for 5% of dry matter.
            Constant StructuralFraction: FixedValue=1
          Constant Metabolic: FixedValue=0
          StorageDMDemandFunction Storage
            SubtractFunction StorageFraction
              Constant One: FixedValue=1
              VariableReference StructuralFraction: VariableName=[Root].DMDemands.Structural.StructuralFraction.Value()
        BiomassDemand NDemands
          MultiplyFunction Structural
            VariableReference MinNconc: VariableName=[Root].minimumNconc.Value()
            VariableReference PotentialDMAllocation: VariableName=[Root].potentialDMAllocation.Structural
          MultiplyFunction Metabolic
            SubtractFunction MetabolicNconc
              VariableReference CritNconc: VariableName=[Root].criticalNConc.Value()
              VariableReference MinNconc: VariableName=[Root].minimumNconc.Value()
            VariableReference PotentialDMAllocation: VariableName=[Root].potentialDMAllocation.Structural
          StorageNDemandFunction Storage
            VariableReference NitrogenDemandSwitch: VariableName=[Root].nitrogenDemandSwitch.Value()
            VariableReference MaxNconc: VariableName=[Root].maximumNconc.Value()
      CompositeBiomass AboveGround: DMDOfStructural=0.6
        Propertys=[[Leaf].Live, [Leaf].Dead, [StorageRoot].Live, [StorageRoot].Dead, [Petiole].Live, [Petiole].Dead]
      CompositeBiomass BelowGround: Propertys=[[Root].Live, [Root].Dead]; DMDOfStructural=0.6
      CompositeBiomass Total: DMDOfStructural=0.6
        Propertys=[[Leaf].Live, [Leaf].Dead, [StorageRoot].Live, [StorageRoot].Dead, [Petiole].Live, [Petiole].Dead, [Root].Live, [Root].Dead]
      CompositeBiomass TotalLive: DMDOfStructural=0.6
        Propertys=[[Leaf].Live, [Petiole].Live, [StorageRoot].Live, [Root].Live]
      CompositeBiomass TotalDead: DMDOfStructural=0.6
        Propertys=[[Leaf].Dead, [Petiole].Dead, [StorageRoot].Dead, [Root].Dead]
      LinearInterpolationFunction MortalityRate: XProperty=[Leaf].CoverGreen
        XYPairs: X=[0.98, 1]; Y=[0, 1]
      CultivarFolder Cultivars
        Cultivar Brigadier
        Cultivar Rivage
        Cultivar Jamon
      AddFunction SCS
        VariableReference Storage: VariableName=[StorageRoot].Live.MetabolicWt
        VariableReference Metabolic: VariableName=[StorageRoot].Live.StorageWt
        Memo
          Non structural carbohydrates and sugars
    Report: EventNames=[Clock].DoReport
      VariableNames:
        [Clock].Today
        [FodderBeet].AboveGround.N
        [FodderBeet].AboveGround.Wt
        [FodderBeet].AboveGroundDead.N
        [FodderBeet].AboveGroundDead.Wt
        [FodderBeet].AboveGroundLive.N
        [FodderBeet].AboveGroundLive.Wt
        [FodderBeet].Arbitrator.DM.TotalFixationSupply
        [FodderBeet].Arbitrator.DMDemand
        [FodderBeet].Leaf.AppearedCohortNo
        [FodderBeet].Leaf.CohortParameters.MaxArea.Value()
        [FodderBeet].Leaf.CoverDead
        [FodderBeet].Leaf.CoverGreen
        [FodderBeet].Leaf.CoverTotal
        [FodderBeet].Leaf.Dead.N
        [FodderBeet].Leaf.Dead.NConc
        [FodderBeet].Leaf.Dead.Wt
        [FodderBeet].Leaf.DeadCohortNo
        [FodderBeet].Leaf.ExpandedCohortNo
        [FodderBeet].Leaf.Fw
        [FodderBeet].Leaf.Fn
        [FodderBeet].Leaf.Height
        [FodderBeet].Leaf.InitialisedCohortNo
        [FodderBeet].Leaf.LAI
        [FodderBeet].Leaf.Live.N
        [FodderBeet].Leaf.Live.NConc
        [FodderBeet].Leaf.Live.Wt
        [FodderBeet].Leaf.Photosynthesis.RadnInt.Value()
        [FodderBeet].Leaf.Photosynthesis.RUEact.Value()
        [FodderBeet].Leaf.PlantAppearedGreenLeafNo
        [FodderBeet].Leaf.PlantsenescedLeafNo
        [FodderBeet].Leaf.SenescingCohortNo
        [FodderBeet].Leaf.SpecificArea
        [FodderBeet].Leaf.Transpiration
        [FodderBeet].Petiole.Live.NConc
        [FodderBeet].Petiole.Live.Wt
        [FodderBeet].Petiole.Live.N
        [FodderBeet].Petiole.NConc
        [FodderBeet].Petiole.PercentWSC
        [FodderBeet].Phenology.AccumulatedThermalTime.Value()
        [FodderBeet].Phenology.CurrentPhaseName
        [FodderBeet].Phenology.CurrentStageName
        [FodderBeet].Phenology.DailyVernalisation.Value()
        [FodderBeet].Phenology.FlagLeafDAS
        [FodderBeet].Phenology.FloweringDAS
        [FodderBeet].Phenology.MaturityDAS
        [FodderBeet].Phenology.Photoperiod.Value()
        [FodderBeet].Phenology.PhotoPeriodDeltaFunction
        [FodderBeet].Phenology.SoilTemperatureFunction.Value()
        [FodderBeet].Phenology.Stage
        [FodderBeet].Phenology.ThermalTime.Value()
        [FodderBeet].Phenology.Vrn1.Value()
        [FodderBeet].Phenology.Vrn2.Value()
        [FodderBeet].Phenology.Vrn4.Value()
        [FodderBeet].Phenology.Zadok.Stage
        [FodderBeet].Root.Depth
        [FodderBeet].Root.Live.N
        [FodderBeet].Root.Live.NConc
        [FodderBeet].Root.N
        [FodderBeet].Root.Nconc
        [FodderBeet].Root.WaterUptake
        [FodderBeet].Root.Live.Wt
        [FodderBeet].SowingData.Cultivar
        [FodderBeet].StorageRoot.Live.NConc
        [FodderBeet].StorageRoot.Live.Wt
        [FodderBeet].StorageRoot.Live.N
        [FodderBeet].StorageRoot.NConc
        [FodderBeet].StorageRoot.Wt
        [FodderBeet].Structure.Height
        [FodderBeet].Structure.LeafTipsAppeared
        [FodderBeet].Structure.MainStemPopn
        [FodderBeet].Structure.TotalStemPopn
        [FodderBeet].Total.N
        [FodderBeet].Total.NConc
        [FodderBeet].Total.Wt
        [FodderBeet].TotalDead.N
        [FodderBeet].TotalDead.NConc
        [FodderBeet].SCS
        [Phenology].Photoperiod.Value()
        [Soil].SoilWater.SW
        [Soil].SoilWater.SWmm
        [SurfaceOrganicMatter].Wt
        [Weather].MeanT
        sum([Soil].SoilNitrogen.NO3.kgha) as TotalSoilNitrogen
        sum([Soil].SoilWater.SWmm) as ProfileWater
        sum([Soil].SoilNitrogen.mineral_n) as ProfileN
        [Soil].SoilWater.LeachNO3
        [Weather].Rain
        [Irrigation].IrrigationApplied
        [Fertiliser].NitrogenApplied
  DataStore
  Simulation
    Memo Trial details
      This represebts a Grazing trial at Ashley Dean, Canterbury, New Zealand

      Management and Data from
      Edwards, G.R., J.M., d.R., Dalley, D.E., Pinxterhuis, J.B., Cameron, K.C., Bryant, R.H., Di, H.J., Malcolm, B.J.and Chapman, D.F. 2014. Dry matter intake and body condition score change of dairy cows grazing fodder beet, kale and kale-oat forage systems in winter. Proceedings of the New Zealand Grassland Association 76: 81-88.
    Clock: StartDate=2012-10-20; EndDate=2013-08-01
    Summary summaryfile
    Weather: FileName=WeatherFiles\lincoln.met
    SoilArbitrator Soil Arbitrator
    Zone paddock: Area=1; Slope=0
      Soil Lismore: SoilType=NZ_sedementary; Region=Plains; State=Canterbury; Country=New Zealand; Latitude=0; Longitude=0
        DataSource=Generic profile descriptions provided by Trevor Webb and data for functional horizions based on SWAMP project results
        Comments=Bulk density values were measured on the fine earth fraction so values entered into apsim soil are adjusted down to account for stone content (assuming stones are inert from all soil process so their mass and volume is removed from model paramaters).  SAT, DUL, LL15 and Air dry have been adjusted down to account for stone content.  OC has not been adjusted so the model will get the correct carbon and N amounts using the adjusted BD.
        Analysis: Thickness=[200, 100, 300, 300, 300, 300]; PH=[6, 6, 6, 6, 6, 6]; PHUnits=Water; BoronUnits=0
        Water
          Thickness  BD     AirDry  LL15  DUL   SAT
          200        1.09   0.17    0.17  0.37  0.53
          100        1.09   0.17    0.17  0.37  0.53
          300        0.7    0.06    0.07  0.15  0.24
          300        0.455  0.06    0.07  0.15  0.24
          300        0.25   0.01    0.01  0.04  0.16
          300        0.25   0.01    0.01  0.04  0.16
          SoilCrop FodderBeetSoil
            LL=[0.144, 0.136, 0.03, 0.014, 0.01, 0.01]
            KL=[0.286157, 0.252188, 0.215147, 0.273159, 0.21174, 0.0303872]
            XF=[1, 1, 1, 1, 1, 1]
        SoilWater: SummerDate=1-Oct; SummerU=9; SummerCona=4.4; WinterDate=1-Apr; WinterU=6; WinterCona=3; DiffusConst=88; DiffusSlope=35; Salb=0.13; CN2Bare=73; CNRed=20; CNCov=0.8; max_pond=0; Thickness=[200, 100, 300, 300, 300, 300]; SWCON=[0.457632, 0.520003, 0.650583, 0.650598, 0.6506, 0.6506]; ResidueInterception=0
        SoilNitrogen: fom_types=[default, manure, mucuna, lablab, shemp, stable]; fract_carb=[0.2, 0.3, 0.54, 0.57, 0.45, 0]; fract_cell=[0.7, 0.3, 0.37, 0.37, 0.47, 0.1]; fract_lign=[0.1, 0.4, 0.09, 0.06, 0.08, 0.9]
          SoilNitrogenNO3 NO3
          SoilNitrogenNH4 NH4
          SoilNitrogenUrea Urea
          SoilNitrogenPlantAvailableNO3 PlantAvailableNO3
          SoilNitrogenPlantAvailableNH4 PlantAvailableNH4
        SoilOrganicMatter: RootCN=40; EnrACoeff=7.4; EnrBCoeff=0.2; OCUnits=Total
          Thickness  OC        SoilCN  FBiom      FInert    RootWt
          200        2.88977   11      0.0333099  0.478186  367.071
          100        1.05591   11      0.0186614  0.681918  300.533
          300        0.807728  11      0.013031   0.811837  164.936
          300        0.800052  11      0.0106763  0.911118  90.5187
          300        0.8       11      0.0101651  0.956083  49.6777
          300        0.8       11      0.0100221  0.983924  27.2637
        InitialWater: PercentMethod=0; FractionFull=1
        Sample InitialNitrogen: NO3Units=kg/ha; NH4Units=kg/ha; SWUnits=Volumetric; OCUnits=Total; PHUnits=Water
          Thickness  NO3   NH4
          200        27.3  4.3
          100        22.8  7.6
          300        1.2   4.1
          300        9.2   2.7
          300        9.2   2.4
          300        1     0.1
        CERESSoilTemperature
      Plant FodderBeet: CropType=FodderBeet; IsEnding=false; DaysAfterEnding=0
      MicroClimate: a_interception=0; b_interception=1; c_interception=0; d_interception=0; soil_albedo=0.23; SoilHeatFluxFraction=0.4; NightInterceptionFraction=0.5; ReferenceHeight=2
      Irrigation
      Fertiliser
      SurfaceOrganicMatter surface organic matter: InitialResidueName=wheat; InitialResidueType=wheat; InitialResidueMass=0; InitialStandingFraction=0; InitialCPR=0; InitialCNR=80; FractionFaecesAdded=0.5
      Folder Management
        Manager ExtraVariables
```csharp
using Models.Interfaces;
using System;
using Models.Core;
using System.Collections.Generic;
using System.Text;
using Models.Soils;
using Models.PMF;
using Models;
using System.Xml.Serialization;
using APSIM.Shared.Utilities;
using Models.Interfaces;

namespace Models
{
    [Serializable] 
    public class Script : Model
    {
        [Link] private Clock Clock;
        [Link] private Weather Met;
        [Link] private Fertiliser Fert;
        [Link] private Irrigation Irrig;
        [Link] private Plant FodderBeet;
        [Link] private Zone zone;
        [ScopedLinkByName]
        private ISolute Urea;
        [ScopedLinkByName]
        private ISolute NO3;
        [ScopedLinkByName]
        private ISolute NH4;
        [ScopedLinkByName]
        private SoilNitrogen SoilNitrogen;
        [Link] Soils.Soil Soil;
        [Link] Models.Surface.SurfaceOrganicMatter SOM;
                    
        [XmlIgnore] public bool InitialDay { get; set; }
        
        [XmlIgnore] public double AccumPlantN { get; set; }
        [XmlIgnore] public double AccumMineralisation { get; set; }
        [XmlIgnore] public double AccumDenit { get; set; }
        [XmlIgnore] public double AccumFert { get; set; }
        [XmlIgnore] public double AccumLeach { get; set; }
        [XmlIgnore] public double AccumDetach { get; set; }
        [XmlIgnore] public double DeltaSoilOMN { get; set; }
        [XmlIgnore] public double DeltaSurfaceOMN { get; set; }
        [XmlIgnore] public double DeltaSoilMineralN { get; set; }
        [XmlIgnore] public double SoilNitrogenContent { get; set; }
        
        
        
        [XmlIgnore] public double AccumEO { get; set; }
        [XmlIgnore] public double AccumEP { get; set; }
        [XmlIgnore] public double AccumES { get; set; }
        [XmlIgnore] public double AccumDrainage { get; set; }
        [XmlIgnore] public double AccumRunoff { get; set; }
        [XmlIgnore] public double AccumOutflowLat { get; set; }
        [XmlIgnore] public double AccumIrrigation { get; set; }
        [XmlIgnore] public double AccumRainfall { get; set; }
        [XmlIgnore] public double SoilWaterDeficit { get; set; }
    
        [XmlIgnore] public double  InitialSoilOMN { get; set; }
        [XmlIgnore] public double  InitialSurfaceOMN { get; set; }
        [XmlIgnore] public double  InitialMineralN { get; set; }
        
        
        [XmlIgnore] public double SWC { get; set; }
        [XmlIgnore] public double DUL { get; set; }
        [XmlIgnore] public double OutFlowLat { get; set; }

        [XmlIgnore] public double FomN { get; set; }
        [XmlIgnore] public double BiomN { get; set; }
        [XmlIgnore] public double HumN { get; set; }
        [XmlIgnore] public double OrganicN { get; set; }
        [XmlIgnore] public double NO3N { get; set; }
        [XmlIgnore] public double NH4N { get; set; }
        [XmlIgnore] public double UreaN { get; set; }
        [XmlIgnore] public double MineralN { get; set; }
        [XmlIgnore] public double DltNMinRes { get; set; }
        [XmlIgnore] public double DltNMinTot { get; set; }
        [XmlIgnore] public double ResidueWt{ get; set; }
        
        
        [EventSubscribe("Commencing")]
        private void OnSimulationCommencing(object sender, EventArgs e)
        {
            InitialDay = true;
        }
        
        [EventSubscribe("DoManagement")]
        private void OnDoManagement(object sender, EventArgs e)
        {
            //!!!!!! Nitrogen balance components !!!!!!
            FomN = MathUtilities.Sum(SoilNitrogen.FOMN);
            HumN = MathUtilities.Sum(SoilNitrogen.HumicN);
            BiomN = MathUtilities.Sum(SoilNitrogen.MicrobialN);
            OrganicN = FomN + HumN + BiomN;
            NO3N = MathUtilities.Sum(NO3.kgha);
            NH4N = MathUtilities.Sum(NH4.kgha);
            UreaN = MathUtilities.Sum(Urea.kgha);
            MineralN = NO3N + NH4N + UreaN; 
            DltNMinRes = MathUtilities.Sum(SoilNitrogen.dlt_n_min_res);
            DltNMinTot = MathUtilities.Sum(SoilNitrogen.MineralisedN);
        
            //Residue components//
            ResidueWt = SOM.Wt;
            //MathUtilities.Sum(SOM.dlt_SurfaceOM_wt);    Failed:)
            
            int layers = Soil.Thickness.Length;
            if (InitialDay == true)
            {
                InitialSurfaceOMN = SOM.N;
                InitialSoilOMN = OrganicN;
                InitialMineralN = MineralN;
                InitialDay = false;
            }
            DeltaSurfaceOMN = SOM.N - InitialSurfaceOMN;
            //AccumLeach = AccumLeach + Soil.SoilWater.LeachNH4 + Soil.SoilWater.LeachNO3 + Soil.SoilWater.LeachUrea; //Fails
            AccumLeach = AccumLeach + Soil.SoilWater.LeachNO3;
            AccumMineralisation += MathUtilities.Sum(SoilNitrogen.MineralisedN);
            AccumDenit -= MathUtilities.Sum(SoilNitrogen.Denitrification);
            //Root.Nuptake is now reported as Negative
            AccumPlantN -= (double)zone.Get("FodderBeet.Root.NUptake");
            DeltaSoilOMN = OrganicN - InitialSoilOMN;
            DeltaSoilMineralN = MineralN - InitialMineralN;
            SoilNitrogenContent = MineralN;
    
            
            
            //!!!!!! Water balance components !!!!!!
            //!!!!!!^^^^^^^^^^^^^^^^^^^^^^^^^^!!!!!!

            AccumRainfall += Met.Rain;
            //AccumEP -= (double)zone.Get("[FodderBeet].Stover.Transpiration");
            AccumEP -= (double)zone.Get("FodderBeet.Root.WaterUptake");
            SoilWaterDeficit = (SWC - DUL);
            double OutFlowLat = MathUtilities.Sum(Soil.SoilWater.LateralOutflow);
            AccumOutflowLat -= OutFlowLat;
        }
        
        [EventSubscribe("DoManagementCalculations")]
        private void OnDoManagementCalculations(object sender, EventArgs e)
        {
            FomN = MathUtilities.Sum(SoilNitrogen.FOMN);
            HumN = MathUtilities.Sum(SoilNitrogen.HumicN);
            BiomN = MathUtilities.Sum(SoilNitrogen.MicrobialN);
            AccumFert += Fert.NitrogenApplied;
            AccumIrrigation += Irrig.IrrigationApplied;
            
            
            AccumEO -= Soil.SoilWater.Eo;
            AccumES -= Soil.SoilWater.Es; 
            AccumDrainage += Soil.SoilWater.Drainage;
            AccumRunoff -= Soil.SoilWater.Runoff;
            SWC = MathUtilities.Sum(Soil.SoilWater.SWmm);
            DUL = MathUtilities.Sum(Soil.DULmm);
        }
        
        [EventSubscribe("PlantEnding")]
        private void OnPlantEnding(object sender, EventArgs e)
        {
            AccumFert = 0;
            AccumIrrigation = 0;
            
            
            AccumEO = 0;
            AccumES = 0;
            AccumDrainage = 0;
            AccumRunoff = 0;
            
            AccumLeach = 0;
            AccumMineralisation = 0;
            AccumDenit = 0;
            AccumPlantN = 0;
            
            AccumRainfall = 0;
            AccumEP = 0;
            AccumOutflowLat = 0;
            
        }
    }
}
```
        Manager SowDateCv
          InitialRootDepth = 2
          CropToSow = Rivage
          SowingDate = 2012-10-29
```csharp
using System;
using Models.Core;
using System.Collections.Generic;
using System.Text;
using Models.PMF;
using Models;
using System.Xml.Serialization;
using APSIM.Shared.Utilities;
using System.Data;
using Models.PMF.Interfaces;
using Models.Surface;

namespace Models
{
    [Serializable] 
    //[System.Xml.Serialization.XmlInclude(typeof(Model))]
    public class Script : Model
    {
        [Link] Plant FodderBeet;
        [Link] Clock Clock;
        [Link] Zone zone;
        [Link] Simulation Simulation;
        [Link] SurfaceOrganicMatter SurfOM;
        
                
        [Description("Initial Root Depth")]
        public double InitialRootDepth { get; set; }
        [Description("Sown Crop")]
        public string CropToSow { get; set; }
        [Description("Sowing Date")]
        public DateTime SowingDate { get; set; }
        
        
        
        [EventSubscribe("DoManagement")]
        private void OnDoManagement(object sender, EventArgs e)
        {
            if (Clock.Today.Date == SowingDate)
            {
                FodderBeet.Sow(cultivar: CropToSow, population: 9, depth: InitialRootDepth, rowSpacing: 500);
                
            }
                        
            
        }
    }
}
```
        Operations IrrigationEvents
          2012-12-23  [Irrigation].Apply(15);
          2013-01-06  [Irrigation].Apply(15);
          2013-01-13  [Irrigation].Apply(15);
          2013-01-20  [Irrigation].Apply(15);
          2013-01-27  [Irrigation].Apply(15);
          2013-02-06  [Irrigation].Apply(15);
          2013-02-13  [Irrigation].Apply(15);
          2013-02-20  [Irrigation].Apply(15);
          2013-02-27  [Irrigation].Apply(15);
          2013-03-04  [Irrigation].Apply(15);
        Operations NFertEvents
          2012-11-25  [Fertiliser].Apply(100, Fertiliser.Types.UreaN,10);
          2013-01-25  [Fertiliser].Apply(69, Fertiliser.Types.UreaN,10);
        Manager FungalInfection
          InfectionDate = 2015-01-03
          IsInfected = False
```csharp
using System;
using Models.Core;
using Models.PMF;
using APSIM.Shared.Utilities;
using System.Xml.Serialization;
        
namespace Models
{
    [Serializable] 
    [System.Xml.Serialization.XmlInclude(typeof(Model))]
    public class Script : Model
    {
        [Link] Plant FodderBeet;
        [Link] Clock Clock;
        [Link] Zone zone;
        [Link] Summary Summary;


        [Description(" Date of Infection")]
        public DateTime InfectionDate { get; set; }
        [Description("Is Infected")]
        public bool IsInfected  {get; set;}    

        [EventSubscribe("DoManagement")]
        private void OnDoManagement(object sender, EventArgs e)
        {
            

            if (IsInfected == true) // an infected crop
              if (InfectionDate == Clock.Today)
               {
                zone.Set("FodderBeet.Leaf.CohortParameters.SenescenceDuration.BaseValue.FixedValue", 600);
                Summary.WriteMessage(this,"Fodder beet infected with fugal disease");
                }
            
        }
        
    }
}
```
      Report: EventNames=[Clock].DoReport
        VariableNames:
          [Clock].Today
          [FodderBeet].Leaf.Fw
          [FodderBeet].Leaf.Fn
          [FodderBeet].Phenology.CurrentPhaseName
          [FodderBeet].Phenology.Stage
          [FodderBeet].Phenology.ThermalTime.Value()
          [FodderBeet].Phenology.AccumulatedThermalTime.Value()
          [FodderBeet].Leaf.Live.Wt
          [FodderBeet].Petiole.Live.Wt
          [FodderBeet].StorageRoot.Live.Wt
          [FodderBeet].Leaf.LAI
          [FodderBeet].Structure.LeafTipsAppeared
          [FodderBeet].Leaf.PlantAppearedLeafNo
          [FodderBeet].Leaf.PlantAppearedGreenLeafNo
          [FodderBeet].Leaf.PlantsenescedLeafNo
          [FodderBeet].Leaf.CoverGreen
          [FodderBeet].Leaf.CohortParameters.MaxArea.Value()
          [FodderBeet].AboveGround.Wt
          [FodderBeet].Leaf.Photosynthesis.RadnInt.Value()
          [FodderBeet].Leaf.Photosynthesis.RUEact.Value()
          [ExtraVariables].Script.AccumPlantN
          [FodderBeet].Leaf.Live.N
          [FodderBeet].Root.Live.N
          [FodderBeet].StorageRoot.Live.N
          [FodderBeet].Petiole.Live.N
          [FodderBeet].Leaf.Live.NConc
          [FodderBeet].Root.Live.NConc
          [ExtraVariables].Script.AccumFert
          [ExtraVariables].Script.AccumIrrigation as irrigation
          [ExtraVariables].Script.SoilNitrogenContent
    Manager GrazeForageCrop
      Genotype = Friesian
      Sex = Cows
      Age = 36
      Weight = 520
      Pregnant = 0
      Lactating = 0
      YoungNumber = 0
      YoungWt = 0
      StockingRate = 50
      CurrentLocation = Away
      PreGrazingDM = 2800
      PostGrazingDM = 5
      DoNoGrazingWindow = True
      NoGrazeStart = 1-Nov
      NoGrazeEnd = 30-may
      NumStock = 0
      GrazingSeasonIsOpen = False
```csharp
using System;
using Models;
using Models.Core;
using Models.Utilities;
using Models.GrazPlan;
using APSIM.Shared.Utilities;
using System.Xml.Serialization;
using Models.PMF;
using Models.Soils; 
using System.Collections;
using System.Collections.Generic;
using System.Linq;
using Models.AgPasture;
using System.Diagnostics;

namespace Models
{

	[Serializable]
	public class Script : Model
	{
		[Link] Clock clock;
		[Link] Stock stock;
		[Link] List<Zone> paddocks;
		[Link] ISummary summary;
		[Link] Simulation farm;

		private int CurrentGroupNum = 1;    // animal group number
		private int CurrentLocationNum { get; set; }

		public enum Genotypes
		{
			SmallMerino,
			Angus,
			Friesian
		}

		public enum SexTypes
		{
			Cows,
			Heifers,
			Steers,
			Bulls,
			Ewes,
			Weathers,
			Rams,
			Cryptos
		}


		[Separator("Stock type info, the same type of stock are brought onto the paddock at each grazing")]

		[Description("Stock: genotype (e.g. Small Merino, Angus, Friesian):")] 
		public Genotypes Genotype { get; set; }

		[Description("Stock: sex (Cows, Heifers, Steers, Bulls, Ewes, Weathers, Rams, Cryptos):")] 
		public SexTypes Sex { get; set; }

		[Description("Stock: age (months):")] 
		public double Age { get; set; }

		[Description("Stock: weight (kg liveweight /head):")] 
		public double Weight { get; set; }

		[Description("Stock: fertility status (0 if non-pregnant or days since conception):")] 
		public int Pregnant { get; set; }

		[Description("Stock: lactation status (0 if non-lactating or days since parturition):")]
		public int Lactating { get; set; }

		[Description("Stock: number of unweaned young:")]
		public int YoungNumber { get; set; }

		[Description("Stock: weight of unweaned young:")] 
		public double YoungWt { get; set; }

		[Separator("Grazing type info")]

		[Description("Paddock stocking rate (head/ha): ")] 
		public double StockingRate { get; set; }

		[Description("Initial location of the cows (give either the paddock name or 'Away'): ")] 
		public string CurrentLocation { get; set; }

		[Description("Standing biomass at which to bring the stock into the simulation (kg DM/ha): ")] 
		public double PreGrazingDM { get; set; }

		[Description("Standing biomass at which to exit  stock from the simulation (kg DM/ha): ")] 
		public double PostGrazingDM { get; set; }

		[Description("Implement a no-grazing window? (tick for yes): ")] 
		public bool DoNoGrazingWindow { get; set; }

		[Description("Start of the no-grazing window (dd-MMM)")] 
		public string NoGrazeStart { get; set; }

		[Description("End of the no-grazing window (dd-MMM)")] 
		public string NoGrazeEnd { get; set; }


		public int NumStock { get; set; }
		// number of cows on the whole farm
		public bool GrazingSeasonIsOpen { get; set; }


		[EventSubscribe("StartOfSimulation")]
		private void OnStartOfSimulation(object sender, EventArgs e)
		{

			//Debugger.Break();

			summary.WriteMessage(this, "Initialising the paddock information");

			NumStock = (int)(Math.Round(StockingRate * farm.Area, 0));

			if (CurrentLocation.ToLower() != "away")
			{
				BuyStock();
				stock.Move(CurrentGroupNum, CurrentLocation);
				summary.WriteMessage(this, " The Stock have been moved to " + CurrentLocation);
			}

			summary.WriteMessage(this, "     The number of animals has been rounded to " + NumStock + " from " + (StockingRate * farm.Area));
			summary.WriteMessage(this, "     The animals will begin in " + CurrentLocation + " which is paddock number " + CurrentLocationNum + " in the simulation");
			summary.WriteMessage(this, "     The area of the whole farm is " + farm.Area + " ha");

		}

		[EventSubscribe("DoManagement")]
		private void OnDoManagement(object sender, EventArgs e)
		{
			GrazingSeasonIsOpen = true;
			if (DoNoGrazingWindow)
				GrazingSeasonIsOpen = !DateUtilities.WithinDates(NoGrazeStart, clock.Today, NoGrazeEnd);

			bool sellSomeStock = false;
			if (!GrazingSeasonIsOpen)
				sellSomeStock = true;

			double harvestableBiomass = paddocks[0].Plants.Sum(plant => plant.AboveGround.Wt * 10);
			if (harvestableBiomass <= PostGrazingDM)
				sellSomeStock = true;

			if (CurrentLocation == "Away")
				sellSomeStock = false;

			if (CurrentLocation == "Away" && harvestableBiomass >= PreGrazingDM && GrazingSeasonIsOpen)
			{
				CurrentLocation = paddocks[0].Name;
				CurrentLocationNum = paddocks[0].Index;
				BuyStock();
				stock.Move(CurrentGroupNum, CurrentLocation);
				summary.WriteMessage(this, "     Buying stock ");
			}

			if (sellSomeStock)
			{
				CurrentLocation = "Away";
				CurrentLocationNum = -1;
				SellStock();
				summary.WriteMessage(this, "     Selling stock ");
			}

		}


		public void BuyStock()
		{
			CurrentGroupNum = stock.NoGroups + 1;
			StockBuy purchase = new StockBuy();
			purchase.Genotype = ReflectionUtilities.EnumToString(Genotype);
			purchase.Number = NumStock;
			purchase.Sex = ReflectionUtilities.EnumToString(Sex);
			purchase.Age = Age;       // age in months
			purchase.Weight = Weight;  // live weight in kg
			purchase.UseTag = CurrentGroupNum + 1;
			purchase.MatedTo = purchase.Genotype;
			purchase.Pregnant = Pregnant;  // days pregnant, 0 = non pregnant, 1 = pregnant
			purchase.Lactating = Lactating;  // 0 for dry, 1 for lactating
			purchase.NumYoung = YoungNumber;
			purchase.YoungWt = YoungWt;

			stock.Buy(purchase);
		}

		public void SellStock()
		{
			int NumGroups = stock.NoGroups;

			NumGroups = stock.NoGroups;
			for (int gg = 1; gg <= NumGroups; gg++)
			{
				stock.Sell(gg, stock.Number[gg - 1]);
			}
		}
	}
}
```
    Stock: RandSeed=9999
      PaddockList:
        {Area=1, Slope=0}
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