Simulations: Version=159
  Memo Cautions for new users
    ## Cautions for running the model
    - Vineyard conditions differ from one to the other due to differences in local climatic conditions, soil, rootstock, varieity, irrigtation, fertilization and canopy management practice. The current grapevine model rather provide a modelling framework to simulate phenology, canopy development, radiation interception, dry matter production and allocation, non-structural carbohydrate dynamics, yield components, soil water and nitrogen uptake in vineyard, than a universal model that can be applied anywhere without adjustments.
    - The current grapevine model was developed based on a rich phenology and yield dataset of Sauvignon blanc in New Zealand in five regions, mainly in the Marlborough region. The dataset were collected in irrigated and fertilized vineyards where water and nutrient stress were minimized. This was reflected in the simulation through irrigation and fertilization management script as well. For conditions with water and nutrient stress, further calibration based on local dataset would be needed.
    - Parameters for potential bunch number, berry number and berry mass determination were derived based on the long-term Sauvignon blanc trial in Marlborough. The general framework would hold for other varieties as well, but actual parameters needed to be refitted based on robust dataset for other varieties.
    - The current model can allocate vine roots to the alley and allocate the root of the alley crop to the vine row. However, the water and nitrogen competition between the vine and alley crop is based on the value of KL of each species, not based on the amount of root and root density presented in the soil zone. One option is change the KL as a function of root density or directly use root density in the source code. A good dataset of root distribution in different layor would be required. Further calibration of soil water, nitrogen and organic matter dynamics are needed.
    - Currently alley crop was represented by a generic plant model ‘Slurp’. The ‘Slurp’ model can take up water and nitrogen, but does not predict crop growth or yields. We forced its leaf area index to follow a reasonable growth pattern under the vineyard management in Marlborough New Zealand with periodic mowing events. Four different types were provided for the Slurp model: static crop, static tree, pasture, lurcern. see details in the Slurp node by right click and expanding the model structure.
    - The row crop light interception method assume the canopy shape is like a cube. So it is more suitable to use for verticle shoot prunned canopy.
    - Water stress was turned on for leaf expansion and photosynthesis, but nitrogen stress was turned off in the current model. However, nitrogen uptake and availability will still affect the organ development as the arbitrator is conducting biomass and nitrogen allocation automatically in the background.
  Folder Replacements
    Report: EventNames=[Clock].DoReport
      VariableNames:
        [Clock].Today
        [Clock].Today.Year
        [Clock].Today.DayOfYear
        [Weather].DaysSinceWinterSolstice   as DAWS
        [PlantVariables].Script.Height 		as height
        [PlantVariables].Script.LAI         as LAIStrip
        [PlantVariables].Script.FRadInt     as f.rad.int
        [PlantVariables].Script.ET          as transpiration
        [PlantVariables].Script.ES          as Es
        [PlantVariables].Script.PET         as PET
        [PlantVariables].Script.RootDepth   as rootDepth
        [Soil].OutputLayers.SW
        sum([Soil].OutputLayers.SWmm)       as psw
        [Weather].Rain
        [Irrigation].IrrigationApplied
        [Soil].SoilWater.Drainage
        [Grapevine].Phenology.CurrentSeason as CurrentSeason
        [Grapevine].Phenology.Stage
        [Grapevine].Phenology.AccumulatedEmergedTT
        [Grapevine].Phenology.BudBurstDOY      as BudBurstDAWS
        [Grapevine].Phenology.FloweringDOY     as FloweringDAWS
        [Grapevine].Phenology.VeraisonDOY      as VeraisonDAWS
        [Grapevine].Phenology.CurrentStageName as CurrentStageName
        [Grapevine].Phenology.AccumulatedChillingUnitBeforeWinterPruning
        [Grapevine].Structure.PrimaryBudNo
        [Grapevine].Structure.MainStemPopn
        [Grapevine].Structure.LeafTipsAppeared
        [Grapevine].Structure.TotalLeavesPerShoot as leaf.no.shoot
        [Grapevine].Leaf.InitialisedCohortNo
        [Grapevine].Leaf.DeadCohortNo
        [Grapevine].Leaf.AppearedCohortNo as leaf.no.shoot.main
        [Grapevine].Leaf.CohortSize
        [Grapevine].Leaf.Live.NConc
        [Grapevine].Leaf.Transpiration
        [Grapevine].Leaf.LAI/[Grapevine].Population             as leaf.area.vine
        [Grapevine].Leaf.LAI/[Grapevine].Structure.MainStemPopn as leaf.area.shoot
        [Grapevine].Leaf.LAIMainStem/[Grapevine].Structure.MainStemPopn as leaf.area.shoot.main
        [Grapevine].Leaf.LAIBranch/[Grapevine].Structure.MainStemPopn as leaf.area.shoot.lateral
        [Grapevine].Leaf.Fn
        [Grapevine].Leaf.Fw
        [Grapevine].Leaf.Live.Wt
        [Grapevine].Leaf.Live.Wt/[Grapevine].Population as leaf.dw.vine
        [Grapevine].Leaf.Live.Wt/[Grapevine].Structure.MainStemPopn as leaf.dw.shoot
        [Grapevine].Shoot.Live.Wt
        [Grapevine].Shoot.Live.Wt/[Grapevine].Structure.MainStemPopn as shoot.dw.mean
        [Grapevine].Shoot.Live.StructuralWt
        [Grapevine].Shoot.Live.StorageWt
        [Grapevine].Cane.Live.Wt
        [Grapevine].Cane.Live.StructuralWt
        [Grapevine].Cane.Live.StorageWt
        [Grapevine].Trunk.Live.Wt
        [Grapevine].Trunk.Live.StructuralWt
        [Grapevine].Trunk.Live.StorageWt
        [Grapevine].Trunk.Live.StorageWt/[Grapevine].Trunk.Live.Wt as total.NSC.concentration.trunk
        [Grapevine].Root.Live.Wt
        [Grapevine].StructuralRoot.Live.Wt
        [Grapevine].StructuralRoot.Live.StructuralWt
        [Grapevine].StructuralRoot.Live.StorageWt
        [Grapevine].StructuralRoot.Live.StorageWt/[Grapevine].StructuralRoot.Live.Wt as total.NSC.concentration.root
        [Grapevine].Root.NTakenUp
        [Grapevine].StructuralRoot.N
        [Grapevine].Arbitrator.FDM
        [Grapevine].Arbitrator.DM.TotalFixationSupply
        [Grapevine].Berry.Live.Wt
        [Grapevine].Berry.Live.Wt/[Grapevine].Population as TotalBerryDW
        [Grapevine].Berry.SingleBerryDW
        [Grapevine].Berry.SingleBerryFW     as berry.fw.mean
        [Grapevine].Berry.TotalBerryFW/[Grapevine].Population as TotalBerryFW
        [Grapevine].Berry.NumberFunction
        [Grapevine].Berry.ThermalTimeAfterFlowering
        [Grapevine].Berry.WaterContent
        [Grapevine].Berry.N
        [Grapevine].Berry.NFillingRate
        [Grapevine].Berry.Brix 				as brix
        [Grapevine].Berry.TitratableAcid 	as ta
        [Grapevine].Berry.MetFactors.BUN_TmaxIni_Record    as BUN_TmaxIni
        [Grapevine].Berry.MetFactors.BUN_RadIni_Record     as BUN_RadIni
        [Grapevine].Berry.MetFactors.BEN_RainTotFlow as BEN_RainTotFlow
        [Grapevine].Berry.MetFactors.BEN_TmaxIni_Record    as BEN_TmaxIni_Record
        [Grapevine].Berry.MetFactors.BEN_TmaxFlow   as BEN_TmaxFlow
        [Grapevine].Berry.MetFactors.BEN_TminFlow   as BEN_TminFlow
        [Grapevine].Berry.MetFactors.BM_RadFlow      as BM_RadFlow
        [Grapevine].Berry.MetFactors.BM_RainTotFlow  as BM_RainTotFlow
        [Grapevine].Berry.MetFactors.BM_RainTotVer   as BM_RainTotVer
        [Grapevine].Berry.MetFactors.BM_TmaxFlow    as BM_TmaxFlow
        [Grapevine].Berry.YieldComponent.BunchesPerShoot as bunch.no.shoot
        [Grapevine].Berry.YieldComponent.BunchesPerVine  as bunch.no.vine
        [Grapevine].Berry.YieldComponent.BerryNum    as BerryNum
        [Grapevine].Berry.YieldComponent.BerryMass   as berry.fw.est
        [Grapevine].Berry.YieldPerVine               as yield.per.vine
        // Note: for converting into field scale, need the strip area, this could be done by multiplying all by Ai/At = Ai/(A1+A2)
        [Row].Area
        [Alley].Area
        [Row].Area/([Alley].Area+[Row].Area) as Row.FractionArea
        [Alley].Area/([Alley].Area+[Row].Area) as Alley.FractionArea
        [Weather].Radn as TotalRadiation
        [Row].Grapevine.Leaf.RadiationIntercepted
        [Alley].Slurp.Leaf.RadiationIntercepted
        // Carbon balance (basic)
        [Row].Grapevine.AboveGround.Wt
        [Row].Grapevine.BelowGround.Wt
        ([Row].Grapevine.Leaf.Removed.Wt+[Row].Grapevine.Shoot.Removed.Wt+[Row].Grapevine.Cane.Removed.Wt+[Row].Grapevine.Trunk.Removed.Wt+[Row].Grapevine.Berry.Removed.Wt+[Row].Grapevine.StructuralRoot.Removed.Wt+[Row].Grapevine.Root.Removed.Wt) as Row.Grapevine.Removed.Wt
        ([Row].Grapevine.Leaf.Detached.Wt+[Row].Grapevine.Shoot.Detached.Wt+[Row].Grapevine.Cane.Detached.Wt+[Row].Grapevine.Trunk.Detached.Wt+[Row].Grapevine.Berry.Detached.Wt+[Row].Grapevine.StructuralRoot.Detached.Wt+[Row].Grapevine.Root.Detached.Wt) as Row.Grapevine.Detached.Wt
        [Row].SurfaceOrganicMatter.C as Row.SurfaceOM.C
        sum([Row].Soil.SoilNitrogen.FOM.C) as Row.SoilFOM.C
        sum([Row].Soil.SoilNitrogen.Microbial.C)+sum([Row].Soil.SoilNitrogen.Humic.C) as Row.SoilOM.C
        // Water balance (basic)
        [Weather].Rain as Rainfall
        [Row].Irrigation.IrrigationApplied as Row.Irrigation
        [Row].Soil.SoilWater.Runoff as Row.Runoff
        [Row].Soil.SoilWater.Es as Row.Evaporation
        [Row].Grapevine.Leaf.Transpiration as Row.Transpiration
        [Row].Soil.SoilWater.Drainage as Row.Drainage
        sum([Row].Soil.SoilWater.SWmm) as Row.TotalSWC
        [Alley].Irrigation.IrrigationApplied as Alley.Irrigation
        [Alley].Soil.SoilWater.Runoff as Alley.Runoff
        [Alley].Soil.SoilWater.Es as Alley.Evaporation
        [Alley].Slurp.Leaf.Transpiration as Alley.Transpiration
        [Alley].Soil.SoilWater.Drainage as Alley.Drainage
        sum([Alley].Soil.SoilWater.SWmm) as Alley.TotalSWC
        sum([Row].Soil.Physical.SATmm) as TotalSAT
        sum([Row].Soil.Physical.DULmm) as TotalDUL
        sum([Row].Soil.Physical.LL15mm) as TotalLL15
        // Nitrogen balance (basic)
        [Row].SurfaceOrganicMatter.N as Row.SurfaceOM.N
        sum([Row].Soil.SoilNitrogen.FOMN) as Row.SoilFOM.N
        sum([Row].Soil.SoilNitrogen.Microbial.N)+sum([Row].Soil.SoilNitrogen.Humic.C) as Row.SoilOM.N
        [Row].Fertiliser.NitrogenApplied as Row.FertiliserN
        sum([Row].Soil.SoilWater.LeachUrea)+sum([Row].Soil.SoilWater.LeachNO3) as Row.LeachedN
        sum([Row].Soil.SoilNitrogen.Denitrification) as Row.DenitrifiedN
        [Row].Grapevine.Root.NTakenUp*10.0 as Row.UptakeN
        sum([Row].Soil.SoilNitrogen.mineral_n) as Row.Mineral_N
        sum([Alley].Soil.SoilNitrogen.mineral_n) as Alley.Mineral_N
        [Alley].SurfaceOrganicMatter.N as Alley.SurfaceOM.N
        sum([Alley].Soil.SoilNitrogen.FOMN) as Alley.SoilFOM.N
        sum([Alley].Soil.SoilNitrogen.Microbial.N)+sum([Alley].Soil.SoilNitrogen.Humic.C) as Alley.SoilOM.N
        [Alley].Fertiliser.NitrogenApplied as Alley.FertiliserN
        sum([Alley].Soil.SoilWater.LeachUrea)+sum([Alley].Soil.SoilWater.LeachNO3) as Alley.LeachedN
        sum([Alley].Soil.SoilNitrogen.Denitrification) as Alley.DenitrifiedN
        [Alley].Slurp.Root.NTakenUp*10.0 as Alley.UptakeN
        sum([Alley].Slurp.Arbitrator.N.Fixation)*10.0 as Alley.FixedN
    Report ReportAlley: EventNames=[Clock].DoReport
      VariableNames:
        [Clock].Today
        [Clock].Today.Year
        [Clock].Today.DayOfYear
        [Weather].DaysSinceWinterSolstice   as DAWS
        [PlantVariables].Script.Height 		as height
        [PlantVariables].Script.LAI         as LAIStrip
        [PlantVariables].Script.FRadInt     as f.rad.int
        [PlantVariables].Script.ET          as transpiration
        [PlantVariables].Script.ES          as Es
        [PlantVariables].Script.PET         as PET
        [PlantVariables].Script.RootDepth   as rootDepth
        [Soil].OutputLayers.SW
        sum([Soil].OutputLayers.SWmm)       as psw
        [Weather].Rain
        [Irrigation].IrrigationApplied
        [Soil].SoilWater.Drainage
        [Alley].Slurp.Leaf.Live.N
        [Alley].Slurp.Root.NUptake
        [Alley].Slurp.Root.NTakenUp
    Manager PlantVariables
      FRadInt = 0
      ET = 0
      ES = 0
      PET = 0
      LAI = 0
      Height = 0
      RootDepth = 0
      PlantWidth = 0
```csharp
using Models.Climate;
using System;
using Models.Core;
using Models.PMF;
using System.Collections.Generic;
using Models.Soils;
using APSIM.Shared.Utilities;
using Models.Zones;
using Models.PMF.Organs;

namespace Models
{
    [Serializable]
    public class Script : Model
    {
        [Link] private Weather weather;
        private RectangularZone AlleyZone {get; set; }
        private RectangularZone RowZone {get; set;}
        private RectangularZone ThisZone {get; set;}
        private double AreaWidth {get; set;}

        public double FRadInt {get; set;}
        public double ET {get; set;}
        public double ES {get; set;}
        public double PET {get; set;}
        public double LAI {get; set;}
        public double Height {get; set;}
        public double RootDepth {get; set;}
        public double PlantWidth {get; set;}

        [EventSubscribe("StartOfSimulation")]
        private void DoStartOfSimulation(object sender, EventArgs e)
        {
               
               ThisZone = this.Parent.Parent as RectangularZone;
               RowZone = this.Parent.Parent.Parent.FindInScope("Row") as RectangularZone;
               AlleyZone = (RectangularZone)this.Parent.Parent.Parent.FindInScope("Alley") as RectangularZone;
               AreaWidth = AlleyZone.Width + RowZone.Width;
               PlantWidth = 0;
        }
        
        [EventSubscribe("DoReportCalculations")]
        private void OnDoReportCalculations(object sender, EventArgs e)
        {
            if (ThisZone.Name == "Row")
                {
                FRadInt = ((double)RowZone.Get("Grapevine.Leaf.RadiationIntercepted") * RowZone.Width)/(weather.Radn * AreaWidth);
                ET = (double)RowZone.Get("Grapevine.Leaf.Transpiration") * RowZone.Width/AreaWidth;
                LAI = (double)RowZone.Get("Grapevine.Leaf.LAI");
                //LAIPerVine =  LAI*RowZone.Width*1.8;
                //TreeInitialisation.Script.VineDistance;
                //(double)RowZone.Get("Grapevine.Leaf.LAI");
                Height = (double)RowZone.Get("Grapevine.Leaf.Height");
                RootDepth = (double)RowZone.Get("Grapevine.Root.Depth");
                PlantWidth = (double)RowZone.Get("Grapevine.Leaf.Width");
                }
            else
                {
                FRadInt = ((double)AlleyZone.Get("Slurp.Leaf.RadiationIntercepted") * ThisZone.Width)/ (weather.Radn * AreaWidth);
                ET = (double)AlleyZone.Get("Slurp.Leaf.Transpiration") * ThisZone.Width/AreaWidth;
                LAI = (double)AlleyZone.Get("Slurp.Leaf.LAI");
                Height = (double)AlleyZone.Get("Slurp.Leaf.Height");
                RootDepth = (double)AlleyZone.Get("Slurp.Root.Depth");
                }

            ES = (double)ThisZone.Get("Soil.SoilWater.Es") * ThisZone.Width/AreaWidth;
            double PETWidth = Math.Min(Math.Max(PlantWidth,ThisZone.Width),AreaWidth);
            PET = (double)ThisZone.Get("Soil.SoilWater.Eo") * PETWidth/AreaWidth;
        }
    }
}
```
    Manager AutoIrrigationBasedOnWaterDeficit
      FASW = 0
      WaterDeficit = 0
      StartDate = 1-nov
      EndDate = 1-mar
      FASWThreshold = 0.8
      FASWDepth = 2000
      Amount = 20
```csharp
using Models.Interfaces;
using System;
using Models.Core;
using System.Collections.Generic;
using System.Text;
using Models.Soils;
using Models.PMF;
using Models;
using System.Xml.Serialization;
using APSIM.Shared.Utilities;

namespace Models
{
    [Serializable] 
    public class Script : Model
    {
        [Link] private Zone zone;
        [Link] private Irrigation irrigation;
        [Link] private Soil soil;
        [Link] private Clock clock;
        [Link]
        private IPhysical soilPhysical;
        [Link]
        private ISoilWater waterBalance;
        public double FASW { get; set; }
        public double WaterDeficit  { get; set; } 
        
        [Description("Irrigation start window (d-mmm)")]
        public string StartDate { get; set; }
        [Description("Irrigation end window (d-mmm)")]
        public string EndDate { get; set; }

        [Description("Threshold fraction available water (0-1)")]
        public double FASWThreshold { get; set; }

        [Description("Soil depth (mm) to which fraction available water is calculated")]
        public double FASWDepth { get; set; }

        [Description("Amount of water (mm) applied each irrigation")]
        public double Amount { get; set; }

        [EventSubscribe("DoManagement")]
        private void OnDoManagement(object sender, EventArgs e)
        {
            CalculateFASW();
            if (DateUtilities.WithinDates(StartDate, clock.Today, EndDate))
            {
                if (FASW < FASWThreshold)
                {
                    irrigation.Apply(Amount, depth: 0);
                }
            }
        }
        
        private void CalculateFASW()
        {
            double[] LL15 = MathUtilities.Multiply(soilPhysical.LL15, soilPhysical.Thickness);
            double[] DUL = MathUtilities.Multiply(soilPhysical.DUL, soilPhysical.Thickness);
        
            int nlayr = GetLayerIndex();
            double cumdep = MathUtilities.Sum(soilPhysical.Thickness, 0, nlayr, 0.0);

            double excess_fr = MathUtilities.Divide((cumdep - FASWDepth), soilPhysical.Thickness[nlayr], 0.0);

            // note that results may be strange if swdep < ll15
            double avail_sw = (MathUtilities.Sum(waterBalance.SWmm, 0, nlayr, 0.0)
                              - excess_fr * waterBalance.SWmm[nlayr])
                              - (MathUtilities.Sum(LL15, 0, nlayr, 0.0)
                              - excess_fr * LL15[nlayr]);


            double pot_avail_sw = (MathUtilities.Sum(DUL, 0, nlayr, 0.0)
                                  - excess_fr * DUL[nlayr])
                                  - (MathUtilities.Sum(LL15, 0, nlayr, 0.0)
                                  - excess_fr * LL15[nlayr]);

            FASW = MathUtilities.Divide(avail_sw, pot_avail_sw, 0.0);
            WaterDeficit = MathUtilities.Constrain(pot_avail_sw - avail_sw, 0.0, 100000);
        }

        private int GetLayerIndex()
        {
            double[] cumThickness = soilPhysical.ThicknessCumulative;
            for (int i = 1; i < cumThickness.Length; i++)
            {
                if (FASWDepth < cumThickness[i])
                    return i - 1;
            }
            
            return cumThickness.Length - 1;
        }

    }
}
```
    Manager Fertilise on fixed dates
      FertiliserType = NH4NO3N
      FertiliserDates = 10-Nov, 10-Jan
      Amount = 30
      AmountType = True
```csharp
using Models.Soils;
using System;
using Models.Core;
using Models.PMF;
using APSIM.Shared.Utilities;
namespace Models
{
    [Serializable]
    public class Script : Model
    {
        [Link] Clock Clock;
        [Link] Fertiliser Fertiliser;
        
        [Separator("A component to apply fertiliser on one or more dates on every year of the simulation")]

        [Description("Type of fertiliser to apply? ")] 
        public Fertiliser.Types FertiliserType { get; set; }

        [Description("Enter the fertilisation dates as dd-mmm with comma separation (any year information entered will be ignored): ")] 
        public string[] FertiliserDates { get; set; } 

        [Description("Amount of fertiliser to be applied (kg /ha)")] 
        public double Amount { get; set; }

        [Description("Is the above amount to be applied each time? (yes/ticked)? Or is it the total annual amount across all dates (no/unticked)")] 
        public bool AmountType { get; set; }
        
        [EventSubscribe("DoManagement")]
        private void OnDoManagement(object sender, EventArgs e)
        {
            foreach (string ddMMM in FertiliserDates)
            {
                if (DateUtilities.DatesEqual(ddMMM, Clock.Today))
                {
                    if (AmountType)
                        Fertiliser.Apply(Amount: Amount, Type: FertiliserType);
                    else
                        Fertiliser.Apply(Amount: Amount / FertiliserDates.Length, Type: FertiliserType);
                }
            }
        }
    }
}
```
    SurfaceOrganicMatter: InitialResidueName=wheat_stubble; InitialResidueType=wheat; InitialResidueMass=0; InitialStandingFraction=0; InitialCPR=0; InitialCNR=100
      ResidueTypes
        ResidueType:
          fom_type                 fraction_C  po4ppm  nh4ppm  no3ppm  specific_area  cf_contrib  pot_decomp_rate  fr_c             fr_n             fr_p              derived_from
          base_type                0.4         0       0       0       0.0005         1           0.1              [0.2, 0.7, 0.1]  [0.2, 0.7, 0.1]  [0.2, 0.7, 0.1]   -
          inert                    0           0       0       0       0              0           0                -                -                -                 base_type
          manure                   0.08        10      10      10      0.0001         1           0.1              [0.3, 0.3, 0.4]  [0.3, 0.3, 0.4]  [0.3, 0.3, 0.4]   base_type
          RuminantDung_PastureFed  0.4         5       1250    0       0.0001         1           0.1              [0.3, 0.5, 0.2]  [0.3, 0.5, 0.2]  [0.3, 0.5, 0.2]   base_type
          algae                    0.4         0       0       0       0.0005         1           0.1              -                -                -                 base_type
          fym                      0.08        40      10      10      0.0001         1           0.1              [0.3, 0.3, 0.4]  [0.3, 0.3, 0.4]  [0.3, 0.3, 0.4]   base_type
          goatmanure               0.08        5       1307    481     0.0001         1           0.1              [0.3, 0.6, 0.3]  [0.3, 0.6, 0.3]  [0.3, 0.6, 0.34]  base_type
          chickenmanure_base       0.374       5       1307    481     0.0001         1           0.1              [0, 0.5, 0.5]    [0, 0.5, 0.5]    [0, 0.5, 0.5]     base_type
          cm                       0.277       0       2558    873     0              0           0                -                -                -                 chickenmanure_base
          cmA                      0.374       0       1307    481     0              0           0                -                -                -                 chickenmanure_base
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    Manager Reset on date
      ResetDate = 10-Jul
      ResetWater = Yes
      ResetNutrients = Yes
      ResetSOM = Yes
```csharp
using APSIM.Shared.Utilities;
using Models.Surface;
using Models.Utilities;
using Models.Soils.Nutrients;
using Models.Soils;
using Models.PMF;
using Models.Core;
using System;
using Models.Interfaces;

namespace Models
{
    [Serializable]
    public class Script : Model
    {
        [Link] private Clock Clock;
        [Link] private Plant Wheat;
        [Link] private ISoilWater SoilWater;
        [Link] private SoilNitrogen nitrogen;
        [Link] private SurfaceOrganicMatter SOM;
        [Link] private Summary Summary;

        [Description("Date to reset on:")]
        public string ResetDate {get;set;}

        [Description("Reset Water? (Yes or No)")]
        public string ResetWater {get;set;}

        [Description("Reset Soil Nutrients ? (Yes or No)")]
        public string ResetNutrients {get;set;}

        [Description("Reset Surface Organic Matter? (Yes or No)")]
        public string ResetSOM {get;set;}

        [EventSubscribe("DoManagement")]
        private void OnDoManagement(object sender, EventArgs e)
        {
            if (DateUtilities.WithinDates(ResetDate, Clock.Today, ResetDate))
            {
                if (ResetWater == "Yes")
                {
                    Summary.WriteMessage(this, "Reset Water", MessageType.Diagnostic);
                    SoilWater.Reset();
                }
               
                 if (ResetNutrients == "Yes")
                {
                    Summary.WriteMessage(this, "Reset Nitrogen", MessageType.Diagnostic);
                    nitrogen.Reset();
                }

                if (ResetSOM == "Yes")
                {
                    Summary.WriteMessage(this, "Reset Surface OM", MessageType.Diagnostic);
                    SOM.Reset();
                }
            }
        }
    }
}
```
    Manager Fertilise topup
      FertiliserType = NH4NO3N
      Threshold = 50
```csharp
using Models.Soils;
using System;
using Models.Core;
using Models.PMF;
using Models.Soils.Nutrients;
using APSIM.Shared.Utilities;
namespace Models
{
    [Serializable]
    public class Script : Model
    {
        [Link] Clock Clock;
        [Link] Fertiliser Fertiliser;
        [Link] private SoilNitrogenNO3 SoilNitrogenNO3;

        [Description("Type of fertiliser to apply? ")] 
        public Fertiliser.Types FertiliserType { get; set; }
    
        [Description("Threshold amount of NO3 to topup to (kg/ha)")]
        public double Threshold { get; set;}
        
        [EventSubscribe("DoManagement")]
        private void OnDoManagement(object sender, EventArgs e)
        {
            double Amount = Threshold - MathUtilities.Sum(SoilNitrogenNO3.kgha);
            Fertiliser.Apply(Amount: Amount, Type: FertiliserType);
        }
    }
}
```
  DataStore
  Simulation Vineyard
    Weather: FileName=WeatherFiles\Site1003_SEA.met
    Clock: Start=2005-02-25; End=2020-05-01
    Summary
    SoilArbitrator Soil Arbitrator
    MicroClimate: a_interception=0; b_interception=1; c_interception=0; d_interception=0; SoilHeatFluxFraction=0.4; MinimumHeightDiffForNewLayer=0; NightInterceptionFraction=0.5; ReferenceHeight=2
    RectangularZone Row: Length=100; Width=0.9; Slope=0; AspectAngle=0; Altitude=50
      Memo
        Double Guyôt-trained vines, pruned each year to retain 24 nodes were monitored. Vines were trained using vertical shoot positioning (VSP), with an exposed leaf area height of 1.2 m, and trimmed to maintain a compact canopy. Vines were planted 1.8 m apart within the row, and 2.4 m apart between rows. Average flowering date was determined by monitoring all the inflorescences on one cane on a vine in each plot on a regular basis throughout flowering. Likewise, regular berry samples (at least weekly) were taken from before the date of véraison until harvest at a soluble solids concentration value of 21.5 oBrix.
      Plant Grapevine
      Fertiliser
      SurfaceOrganicMatter: InitialResidueName=wheat_stubble; InitialResidueType=wheat; InitialResidueMass=10; InitialStandingFraction=0; InitialCPR=0; InitialCNR=30
      Irrigation
      Soil: Latitude=0; Longitude=0
        LayerStructure: Thickness=[200, 200, 200, 200, 200, 200, 400, 400, 400, 600]
        Physical
          Thickness  BD    AirDry  LL15  DUL   SAT
          200        1.35  0.1     0.2   0.35  0.45
          250        1.35  0.1     0.2   0.35  0.45
          300        1.4   0.15    0.15  0.35  0.4
          150        1.4   0.13    0.13  0.33  0.35
          150        1.4   0.1     0.1   0.28  0.35
          1950       1.59  0.06    0.06  0.1   0.3
          SoilCrop GrapevineSoil: LL=[0.2, 0.2, 0.15, 0.13, 0.1, 0.06]; KL=[0.25, 0.1, 0.08, 0.05, 0.05, 0.01]; XF=[1, 1, 1, 1, 1, 1]
          SoilCrop SlurpSoil: LL=[0.2, 0.2, 0.15, 0.13, 0.1, 0.06]; KL=[0.11, 0.11, 0.02, 0, 0, 0]; XF=[1, 1, 1, 1, 1, 1]
        WaterBalance SoilWater: SummerDate=1-Nov; SummerU=4; SummerCona=1; WinterDate=1-Apr; WinterU=4; WinterCona=1; DiffusConst=88; DiffusSlope=35.4; Salb=0.18; CN2Bare=68; CNRed=20; CNCov=0.8; DischargeWidth=0; CatchmentArea=0; PSIDul=-100
          Thickness  SWCON  KLAT
          150        0.55   0
          150        0.55   0
          100        0.55   0
          200        0.55   0
          200        0.55   0
          200        0.55   0
          200        0.55   0
          200        0.55   0
          200        0.55   0
          200        0.55   0
          200        0.55   0
          200        0.55   0
          400        0.55   0
          400        0.55   0
        Organic: FOMCNRatio=30; CarbonUnits=Total
          Thickness  Carbon  SoilCNRatio  FBiom  FInert  FOM
          100        1.82    11.5         0.025  0.3     1243.93
          200        1.47    11.5         0.025  0.4     833.832
          300        1.2     11.5         0.015  0.75    457.617
          300        1.03    11.5         0.01   0.9     251.145
          300        0.47    11.5         0.01   0.96    137.831
          300        0.47    11.5         0.01   0.96    75.6435
        Chemical: Thickness=[100, 200, 300, 300, 300, 300]; PH=[6.6, 6.2, 5.7, 5.5, 5.5, 5.5]; PHUnits=Water
        CERESSoilTemperature Temperature
        Water: Thickness=[200, 250, 300, 150, 150, 1950]; InitialValues=[0.35, 0.35, 0.35, 0.33, 0.28, 0.1]; InitialPAWmm=262.5; RelativeTo=LL15; FilledFromTop=true
        OutputLayers: Thickness=[150, 150, 150, 150, 150, 150, 150]
        SoilNitrogen: fom_types=[default, manure, mucuna, lablab, shemp, stable]; fract_carb=[0.2, 0.3, 0.54, 0.57, 0.45, 0]; fract_cell=[0.7, 0.3, 0.37, 0.37, 0.47, 0.1]; fract_lign=[0.1, 0.4, 0.09, 0.06, 0.08, 0.9]; NPartitionApproach=0
        SoilNitrogenNO3 NO3: Thickness=[100, 200, 300, 300, 300, 300]; InitialValues=[3, 2, 1, 1, 0, 0]; InitialValuesUnits=ppm; WaterTableConcentration=0; D0=0; DepthConstant=0; MaxDepthSoluteAccessible=0; RunoffEffectivenessAtMovingSolute=0; MaxEffectiveRunoff=0
        SoilNitrogenNH4 NH4: Thickness=[100, 200, 300, 300, 300, 300]; InitialValues=[3, 1.5, 1.2, 1.1, 0, 0]; InitialValuesUnits=ppm; WaterTableConcentration=0; D0=0; DepthConstant=0; MaxDepthSoluteAccessible=0; RunoffEffectivenessAtMovingSolute=0; MaxEffectiveRunoff=0
        SoilNitrogenUrea Urea: Thickness=[100, 200, 300, 300, 300, 300]; InitialValues=[0, 0, 0, 0, 0, 0]; InitialValuesUnits=kg/ha; WaterTableConcentration=0; D0=0; DepthConstant=0; MaxDepthSoluteAccessible=0; RunoffEffectivenessAtMovingSolute=0; MaxEffectiveRunoff=0
      Manager SetupTreeRootZones
        UseExtraZone = True
```csharp
using Models.Soils;
using Models.Functions;
using APSIM.Shared.Utilities;
using System.Xml.Serialization;
using Models;
using Models.PMF;
using System.Text;
using System.Collections.Generic;
using Models.Core;
using System;
using Models.PMF.Organs;

namespace Models
{
    [Serializable] 
    public class Script : Model
    {
        [Link] private Plant Grapevine;
        [Link] private Clock Clock;
        [Link] private Zone zone;
        [Link(Type = LinkType.Path, Path = "[Grapevine].Root")]
        private Root root;

        [Description("Use extra root zone")]
        public bool UseExtraZone { get; set; }

        
        [EventSubscribe("StartOfSimulation")]
        private void OnSimulationCommencing(object sender, EventArgs e)
        {
            if (UseExtraZone)
            {
            root.ZoneNamesToGrowRootsIn.Add("Alley");
            root.ZoneRootDepths.Add(2600);
            NutrientPoolFunctions InitialDM = new NutrientPoolFunctions();
            Constant InitStruct = new Constant();
            InitStruct.FixedValue = 10;
            InitialDM.Structural = InitStruct;
            Constant InitMetab = new Constant();
            InitMetab.FixedValue = 0;
            InitialDM.Metabolic = InitMetab;
            Constant InitStor = new Constant();
            InitStor.FixedValue = 0;
            InitialDM.Storage = InitStor;
            root.ZoneInitialDM.Add(InitialDM);

            }
        }
    }
}
```
      Manager PlantVariables
```csharp
using Models.Climate;
using System;
using Models.Core;
using Models.PMF;
using System.Collections.Generic;
using Models.Soils;
using APSIM.Shared.Utilities;
using Models.Zones;
using Models.PMF.Organs;

namespace Models
{
    [Serializable]
    public class Script : Model
    {
        [Link] private Weather weather;
        [Link(Type = LinkType.Path, Path = "[Grapevine].Root")]
        private Root root;
        private RectangularZone AlleyZone {get; set; }
        private RectangularZone RowZone {get; set;}
        private RectangularZone ThisZone {get; set;}
        private double AreaWidth {get; set;}

        public double FRadInt {get; set;}
        public double ET {get; set;}
        public double ES {get; set;}
        public double PET {get; set;}
        public double LAI {get; set;}
        public double Height {get; set;}
        public double RootDepth {get; set;}
        public double PlantWidth {get; set;}

        [EventSubscribe("StartOfSimulation")]
        private void DoStartOfSimulation(object sender, EventArgs e)
        {
               
               ThisZone = this.Parent.Parent as RectangularZone;
               RowZone = this.Parent.Parent.Parent.FindInScope("Row") as RectangularZone;
               AlleyZone = (RectangularZone)this.Parent.Parent.Parent.FindInScope("Alley") as RectangularZone;
               AreaWidth = AlleyZone.Width + RowZone.Width;
               PlantWidth = 0;
        }
        
        [EventSubscribe("DoReportCalculations")]
        private void OnDoReportCalculations(object sender, EventArgs e)
        {
            if (ThisZone.Name == "Row")
                {
                FRadInt = ((double)RowZone.Get("Grapevine.Leaf.RadiationIntercepted") * RowZone.Width)/(weather.Radn * AreaWidth);
                ET = (double)RowZone.Get("Grapevine.Leaf.Transpiration") * RowZone.Width/AreaWidth;
                LAI = (double)RowZone.Get("Grapevine.Leaf.LAI");
                //LAIPerVine =  LAI*RowZone.Width*1.8;
                //TreeInitialisation.Script.VineDistance;
                //(double)RowZone.Get("Grapevine.Leaf.LAI");
                Height = (double)RowZone.Get("Grapevine.Leaf.Height");
                RootDepth = (double)RowZone.Get("Grapevine.Root.Depth");
                PlantWidth = (double)RowZone.Get("Grapevine.Leaf.Width");
                }
            else
                {
                FRadInt = ((double)AlleyZone.Get("Slurp.Leaf.RadiationIntercepted") * ThisZone.Width)/ (weather.Radn * AreaWidth);
                ET = (double)AlleyZone.Get("Slurp.Leaf.Transpiration") * ThisZone.Width/AreaWidth;
                LAI = (double)AlleyZone.Get("Slurp.Leaf.LAI");
                Height = (double)AlleyZone.Get("Slurp.Leaf.Height");
                RootDepth = (double)AlleyZone.Get("Slurp.Root.Depth");
                }

            ES = (double)ThisZone.Get("Soil.SoilWater.Es") * ThisZone.Width/AreaWidth;
            double PETWidth = Math.Min(Math.Max(PlantWidth,ThisZone.Width),AreaWidth);
            PET = (double)ThisZone.Get("Soil.SoilWater.Eo") * PETWidth/AreaWidth;
        }
    }
}
```
      Manager DripIrrigator
        FertilizeDAWS = 100
        Amount = 30
```csharp
using Models.Climate;
using System;
using Models.Core;
using System.Collections.Generic;
using System.Text;
using Models.Soils;
using Models.PMF;
using Models;
using System.Xml.Serialization;
using APSIM.Shared.Utilities;

namespace Models
{
    [Serializable] 
    public class Script : Model
    {
       [Link] Irrigation irrigation;
       [Link] Clock Clock;
       [Link] Fertiliser Fertiliser;
       [Link] Summary Summary;
       [Link] Weather weather;

        [Description("Fertilize_DAWS")]
         public int FertilizeDAWS { get; set; }
        [Description("Amount of fertiliser to be applied")]
        public double Amount { get; set; }

       [EventSubscribe("DoManagement")]
        private void OnDoManagement(object sender, EventArgs e)
        {
          if (weather.DaysSinceWinterSolstice == FertilizeDAWS)
           Fertiliser.Apply(Amount: Amount, Type: Fertiliser.Types.NO3N);
        }


       public void applyDripIrri(double amount)
        {
            double layerAmount = amount/4;
            irrigation.Apply(layerAmount, 0);
            irrigation.Apply(layerAmount*2, 220);
            irrigation.Apply(layerAmount, 420);

        }
        public double totalIrrigation {get; set;}
        [EventSubscribe("Irrigated")]
        private void OnIrrigated(object sender, 
        IrrigationApplicationType irrigData)
        {
            totalIrrigation += irrigData.Amount;
         }
    }
}
```
      Manager HarvestNPruning
        LeafPluckingDAWS = 205
        HarvestDAWS = 290
        PruningDAWS = 314
        FrostDate1 = 10/03/2002 00:00:00
        FrostDate2 = 11/18/2002 00:00:00
```csharp
using Models.Soils;
using Models.PMF.Phen;
using Models.PMF.Organs;
using System.Xml.Serialization;
using Models.PMF.Interfaces;
using Models.PMF;
using Models.Core;
using System.Collections.Generic;
using System;
using Models.Climate;
using Models.PMF.Struct;
using Newtonsoft.Json;

namespace Models
{
    [Serializable] 
    [System.Xml.Serialization.XmlInclude(typeof(Model))]
    public class Script : Model
    {
        [Link] private Plant Grapevine;
        [Link] private Clock Clock;
        [Link] private Zone zone;
        [Link] private Weather weather;
        [Link]
        private Root root;
        [Link(Type = LinkType.Path, Path = "[Grapevine].Structure")]
        private Structure structure;
        [Link(Type = LinkType.Path, Path = "[Grapevine].Phenology")]
        private Phenology phenology;
       
        [Description("SummerPruning_DAWS")]         
        public int LeafPluckingDAWS { get; set; }  //day

        [Description("Harvest_DAWS")]
        public int HarvestDAWS { get; set; }

        [Description("Pruning_DAWS")]         
        public int PruningDAWS { get; set; }  //day

        [Description("Frost Date 1")]
        public DateTime FrostDate1 { get; set; }
        [Description("Frost Date 2")]
        public DateTime FrostDate2 { get; set; }


        [JsonIgnore] private RemovalFractions Remove_1 { get; set; }
        [JsonIgnore] private RemovalFractions Remove_2 { get; set; }
        [JsonIgnore] private RemovalFractions Remove_3 { get; set; }
        [JsonIgnore] private RemovalFractions Remove_4 { get; set; }
        [JsonIgnore] private RemovalFractions Remove_5 { get; set; }
        [EventSubscribe("StartOfSimulation")]
        private void OnSimulationCommencing(object sender, EventArgs e)
        {
            Remove_1 = new RemovalFractions();
            Remove_2 = new RemovalFractions();
            Remove_3 = new RemovalFractions();
            Remove_4 = new RemovalFractions();
            Remove_5 = new RemovalFractions();
        }
        
        [EventSubscribe("DoManagement")]
        private void OnDoManagement(object sender, EventArgs e)
        {
             //Set up  array of remove fractions to send with Cut method.  Each member in the array corresponds to an organ in the same order they are set up in.
             //PruneDate = DateTime.Parse(PruneDateString);
             if (weather.DaysSinceWinterSolstice == LeafPluckingDAWS && phenology.Stage >= 3)
             {
                    
                //int LeafTipsAppeared = (int)structure.LeafTipsAppeared;
                //int NodesToRemove = (int)Math.Max(LeafTipsAppeared - TargetLeafRank, 1); 
                double FractionToRemove = 0.3; //1- TargetLeafRank/LeafTipsAppeared;
            
                Remove_1.SetFractionToRemove("Leaf", 0, "live");
                Remove_1.SetFractionToRemove("Shoot", 0);
                Remove_1.SetFractionToRemove("Cane", 0);
                Remove_1.SetFractionToRemove("Trunk", 0);
                Remove_1.SetFractionToRemove("Root", 0);
                Remove_1.SetFractionToRemove("StructuralRoot", 0);
                Remove_1.SetFractionToRemove("Berry", 0);
            
                Remove_1.SetFractionToResidue("Leaf", FractionToRemove, "live");
                Remove_1.SetFractionToResidue("Shoot", FractionToRemove);
                Remove_1.SetFractionToResidue("Cane", 0);
                Remove_1.SetFractionToResidue("Trunk", 0);
                Remove_1.SetFractionToResidue("Root", 0);
                Remove_1.SetFractionToRemove("StructuralRoot", 0);
                Remove_1.SetFractionToResidue("Berry", 0);
            
               // Remove_1.NodesToRemove = NodesToRemove;
                Grapevine.RemoveBiomass("LeafPluck", Remove_1);
        
             }

           if (weather.DaysSinceWinterSolstice == HarvestDAWS && phenology.Stage >= 3)
           {
               
               Remove_2.SetFractionToRemove("Leaf", 0, "live");
               Remove_2.SetFractionToRemove("Shoot",  0);
               Remove_2.SetFractionToRemove("Cane", 0);
               Remove_2.SetFractionToRemove("Trunk",  0);
               Remove_2.SetFractionToRemove("Root",   0);
               Remove_2.SetFractionToRemove("StructuralRoot", 0);
               Remove_2.SetFractionToRemove("Berry",  1);
         
               Remove_2.SetFractionToResidue("Leaf",   0.2, "live");
               Remove_2.SetFractionToResidue("Shoot",  0);
               Remove_2.SetFractionToResidue("Cane", 0);
               Remove_2.SetFractionToResidue("Trunk",  0);
               Remove_2.SetFractionToResidue("Root",   0);
               Remove_2.SetFractionToRemove("StructuralRoot", 0);
               Remove_2.SetFractionToResidue("Berry",  0);
         
               Grapevine.RemoveBiomass("LeafPluck", Remove_2);
           }
                                   
            if (weather.DaysSinceWinterSolstice == PruningDAWS&& phenology.Stage >= 3)
            {
                Remove_3.SetPhenologyStage = 1;

                Remove_3.SetFractionToRemove("Leaf",   0, "live");
                Remove_3.SetFractionToRemove("Shoot",  0);
                Remove_3.SetFractionToRemove("Cane", 0);
                Remove_3.SetFractionToRemove("Trunk",  0);
                Remove_3.SetFractionToRemove("Root",   0);
                Remove_3.SetFractionToRemove("Berry",  0);

                Remove_3.SetFractionToResidue("Leaf",   1, "live");
                Remove_3.SetFractionToResidue("Shoot",  1);
                Remove_3.SetFractionToResidue("Cane", 1);
                Remove_3.SetFractionToResidue("Trunk",  0);
                Remove_3.SetFractionToResidue("Root",   0);
                Remove_3.SetFractionToRemove("StructuralRoot", 0);
                Remove_3.SetFractionToResidue("Berry",  1);

                Grapevine.RemoveBiomass("Prune", Remove_3);

                double caneBiomass = 96.9; //g/m2 reset the cane biomass to the original value 
                double caneNSC = caneBiomass * 0.18;

                zone.Set("[Grapevine].Cane.Live.StorageWt", caneNSC);                
                zone.Set("[Grapevine].Cane.Live.StructuralWt", caneBiomass - caneNSC); 

                //zone.Set("[Grapevine].Trunk.Live.StructuralWt", 280);     
               // zone.Set("[Grapevine].Trunk.Live.StorageWt", 70);     

               // zone.Set("[Grapevine].Root.Live.StructuralWt", 1531);     
               // zone.Set("[Grapevine].Root.Live.StorageWt",  349);     

            }
           if (Clock.Today.Date == FrostDate1)      
           {
              Remove_4.SetFractionToRemove("Leaf", 0, "live");
              Remove_4.SetFractionToRemove("Shoot",  0);
              Remove_4.SetFractionToRemove("Cane", 0);
              Remove_4.SetFractionToRemove("Trunk",  0);
              Remove_4.SetFractionToRemove("Root",   0);
              Remove_4.SetFractionToRemove("StructuralRoot", 0);
              Remove_4.SetFractionToRemove("Berry",  0);
           //
              Remove_4.SetFractionToResidue("Leaf",   0.2, "live");
              Remove_4.SetFractionToResidue("Shoot",  0);
              Remove_4.SetFractionToResidue("Cane", 0);
              Remove_4.SetFractionToResidue("Trunk",  0);
              Remove_4.SetFractionToResidue("Root",   0);
              Remove_4.SetFractionToRemove("StructuralRoot", 0);
              Remove_4.SetFractionToResidue("Berry",  0);
           //
              Grapevine.RemoveBiomass("LeafPluck", Remove_4);
              zone.Set("[Grapevine].Structure.FinalLeafNumber.FixedValue", 28); 
           //
           }  

           if (Clock.Today.Date == FrostDate2)      
           {
              Remove_5.SetFractionToRemove("Leaf", 0, "live");
              Remove_5.SetFractionToRemove("Shoot",  0);
              Remove_5.SetFractionToRemove("Cane", 0);
              Remove_5.SetFractionToRemove("Trunk",  0);
              Remove_5.SetFractionToRemove("Root",   0);
              Remove_5.SetFractionToRemove("StructuralRoot", 0);
              Remove_5.SetFractionToRemove("Berry",  0);
           //
              Remove_5.SetFractionToResidue("Leaf",   0.2, "live");
              Remove_5.SetFractionToResidue("Shoot",  0);
              Remove_5.SetFractionToResidue("Cane", 0);
              Remove_5.SetFractionToResidue("Trunk",  0);
              Remove_5.SetFractionToResidue("Root",   0);
              Remove_5.SetFractionToRemove("StructuralRoot", 0);
              Remove_5.SetFractionToResidue("Berry",  0);
           //
              Grapevine.RemoveBiomass("LeafPluck", Remove_5);
           //
           }  

        }
    }
}
```
      Manager AutoIrrigationBasedOnWaterDeficit
        StartDate = 1-nov
        EndDate = 1-mar
        FASWThreshold = 0.6
        FASWDepth = 1500
        Amount = 20
        script: same as in Replacements.AutoIrrigationBasedOnWaterDeficit
      Manager Fertilise on fixed dates
        FertiliserType = NH4NO3N
        FertiliserDates = 1-Nov, 1-Feb
        Amount = 15
        AmountType = True
        script: same as in Replacements.Fertilise on fixed dates
      Manager Reset on date
        ResetDate = 10-Jul
        ResetWater = Yes
        ResetNutrients = Yes
        ResetSOM = Yes
```csharp
using APSIM.Shared.Utilities;
using Models.Surface;
using Models.Utilities;
using Models.Soils.Nutrients;
using Models.Soils;
using Models.PMF;
using Models.Core;
using System;
using Models.Interfaces;
using System.Diagnostics;

namespace Models
{
    [Serializable]
    public class Script : Model
    {
        [Link] private Clock Clock;
        [Link] private Plant Wheat;
        [Link] private ISoilWater SoilWater;
        [Link] private SoilNitrogen nitrogen;
        [Link] private SurfaceOrganicMatter SOM;
        [Link] private Summary Summary;

        [Description("Date to reset on:")]
        public string ResetDate {get;set;}

        [Description("Reset Water? (Yes or No)")]
        public string ResetWater {get;set;}

        [Description("Reset Soil Nutrients ? (Yes or No)")]
        public string ResetNutrients {get;set;}

        [Description("Reset Surface Organic Matter? (Yes or No)")]
        public string ResetSOM {get;set;}

        [EventSubscribe("DoManagement")]
        private void OnDoManagement(object sender, EventArgs e)
        {
        	Debugger.Break();
            if (DateUtilities.WithinDates(ResetDate, Clock.Today, ResetDate))
            {
                if (ResetWater == "Yes")
                {
                    Summary.WriteMessage(this, "Reset Water", MessageType.Diagnostic);
                    SoilWater.Reset();
                }
               
                 if (ResetNutrients == "Yes")
                {
                    Summary.WriteMessage(this, "Reset Nitrogen", MessageType.Diagnostic);
                    nitrogen.Reset();
                }

                if (ResetSOM == "Yes")
                {
                    Summary.WriteMessage(this, "Reset Surface OM", MessageType.Diagnostic);
                    SOM.Reset();
                }
            }
        }
    }
}
```
      Report: EventNames=[Clock].DoReport
        VariableNames:
          [Clock].Today
          [Clock].Today.Year
          [Clock].Today.DayOfYear
          [Weather].DaysSinceWinterSolstice   as DAWS
          [PlantVariables].Script.Height 		as height
          [PlantVariables].Script.LAI         as lai
          [PlantVariables].Script.FRadInt     as f.rad.int
          [PlantVariables].Script.ET          as transpiration
          [PlantVariables].Script.ES          as Es
          [PlantVariables].Script.PET         as PET
          [PlantVariables].Script.RootDepth   as rootDepth
          [Soil].OutputLayers.SW
          sum([Soil].OutputLayers.SWmm)       as psw
          [Weather].Rain
          [Irrigation].IrrigationApplied
          [Soil].SoilWater.Drainage
          [Grapevine].Phenology.CurrentSeason as CurrentSeason
          [Grapevine].Phenology.Stage
          [Grapevine].Phenology.AccumulatedEmergedTT
          [Grapevine].Phenology.BudBurstDOY      as BudBurstDAWS
          [Grapevine].Phenology.FloweringDOY     as FloweringDAWS
          [Grapevine].Phenology.VeraisonDOY      as VeraisonDAWS
          [Grapevine].Phenology.CurrentStageName as CurrentStageName
          [Grapevine].Phenology.AccumulatedChillingUnitBeforeWinterPruning
          [Grapevine].Structure.PrimaryBudNo
          [Grapevine].Structure.MainStemPopn
          [Grapevine].Structure.LeafTipsAppeared
          [Grapevine].Structure.TotalLeavesPerShoot as leaf.no.shoot
          [Grapevine].Leaf.InitialisedCohortNo
          [Grapevine].Leaf.DeadCohortNo
          [Grapevine].Leaf.AppearedCohortNo
          [Grapevine].Leaf.CohortSize
          [Grapevine].Leaf.LAI as LAI
          [Grapevine].Leaf.LAI/[Grapevine].Population             as leaf.area.vine
          [Grapevine].Leaf.LAI/[Grapevine].Structure.MainStemPopn as leaf.area.shoot
          [Grapevine].Leaf.LAIMainStem/[Grapevine].Structure.MainStemPopn as leaf.area.shoot.main
          [Grapevine].Leaf.LAIBranch/[Grapevine].Structure.MainStemPopn as leaf.area.shoot.lateral
          [Grapevine].Leaf.Fn
          [Grapevine].Leaf.Fw
          [Grapevine].Leaf.Live.Wt
          [Grapevine].Leaf.Live.Wt/[Grapevine].Structure.MainStemPopn as leaf.dw.shoot
          [Grapevine].Shoot.Live.Wt
          [Grapevine].Shoot.Live.Wt/[Grapevine].Structure.MainStemPopn as shoot.dw
          [Grapevine].Shoot.Live.StructuralWt
          [Grapevine].Shoot.Live.StorageWt
          [Grapevine].Cane.Live.Wt
          [Grapevine].Cane.Live.StructuralWt
          [Grapevine].Cane.Live.StorageWt
          [Grapevine].Trunk.Live.Wt
          [Grapevine].Trunk.Live.StructuralWt
          [Grapevine].Trunk.Live.StorageWt
          [Grapevine].Trunk.Live.StorageWt/[Grapevine].Trunk.Live.Wt as total.NSC.concentration.trunk
          [Grapevine].Root.Live.Wt
          [Grapevine].StructuralRoot.Live.Wt
          [Grapevine].StructuralRoot.Live.StructuralWt
          [Grapevine].StructuralRoot.Live.StorageWt
          [Grapevine].StructuralRoot.Live.StorageWt/[Grapevine].StructuralRoot.Live.Wt as total.NSC.concentration.root
          [Grapevine].Arbitrator.FDM
          [Grapevine].Arbitrator.DM.TotalFixationSupply
          [Grapevine].Berry.Live.Wt
          [Grapevine].Berry.SingleBerryDW
          [Grapevine].Berry.SingleBerryFW     as berry.fw.mean
          [Grapevine].Berry.TotalBerryFW
          [Grapevine].Berry.NumberFunction
          [Grapevine].Berry.ThermalTimeAfterFlowering
          [Grapevine].Berry.WaterContent
          [Grapevine].Berry.Brix 				as brix
          [Grapevine].Berry.TitratableAcid 	as ta
          [Grapevine].Berry.MetFactors.BUN_TmaxIni_Record    as BUN_TmaxIni
          [Grapevine].Berry.MetFactors.BUN_RadIni_Record     as BUN_RadIni
          [Grapevine].Berry.MetFactors.BEN_RainTotFlow as BEN_RainTotFlow
          [Grapevine].Berry.MetFactors.BEN_TmaxIni_Record    as BEN_TmaxIni_Record
          [Grapevine].Berry.MetFactors.BEN_TmeanFlow   as BEN_TmeanFlow
          [Grapevine].Berry.MetFactors.BM_RadFlow      as BM_RadFlow
          [Grapevine].Berry.MetFactors.BM_RainTotFlow  as BM_RainTotFlow
          [Grapevine].Berry.MetFactors.BM_RainTotVer   as BM_RainTotVer
          [Grapevine].Berry.MetFactors.BM_TmeanFlow    as BM_TmeanFlow
          [Grapevine].Berry.YieldComponent.BunchesPerShoot as bunch.no.shoot
          [Grapevine].Berry.YieldComponent.BunchesPerVine  as bunch.no.vine
          [Grapevine].Berry.YieldComponent.BerryNum    as BerryNum
          [Grapevine].Berry.YieldComponent.BerryMass   as berry.fw.est
          [Grapevine].Berry.YieldPerVine               as yield.per.vine
      Manager TreeInitialisation
        CultivarName = SauvignonBlanc
        SowingDate = 02/25/2005 00:00:00
        VineDistance = 1.8
        BudNumber = 48
        CaneNumber = 4
        CaneDiameter = 10
        CaneLength = 0.9
        TrunkDiameter = 40
        TrunkLength = 0.8
        RootTrunkRatio = 1
        RootNSC = 0.2
        TrunkNSC = 0.2
        CaneNSC = 0.2
        StartAge = 3
```csharp
using Models.PMF.Phen;
using Models.Zones;
using Models.Soils;
using APSIM.Shared.Utilities;
using Models.PMF;
using Models.Core;
using System;
using Models.PMF.Struct;
        
namespace Models
{
    [Serializable] 
    [System.Xml.Serialization.XmlInclude(typeof(Model))]
    public class Script : Model
    {
        [Link] private Plant Grapevine;
        [Link] private Clock Clock;
        [Link] private Soil Soil;
        [Link] private Zone zone;
        [Link]
        private Structure structure;
        [Link]
        private Phenology phenology;

        [Display(Type = DisplayType.CultivarName)]
        [Description("Plant Type")]
        public string CultivarName { get; set; }

        [Description("Initialisation Date")]
        public DateTime SowingDate { get; set; }

        [Description("Vine distance(m)")]
        public double VineDistance { get; set; }
        //number of buds lay down in cane and spur. there is a function inside to calculate the number of buds per vine based on bud burst and from cane head
        [Description("Bud number(#)")]
        public double BudNumber { get; set; }
        //cane or spur biomass
        [Description("Cane number(#)")]
        public double CaneNumber { get; set; }
      
        [Description("Cane diameter(mm)")]
        public double CaneDiameter { get; set; }

        [Description("Cane length(m)")]
        public double CaneLength { get; set; }
        //trunk information
        [Description("Trunk diameter(mm)")]
        public double TrunkDiameter { get; set; }

        [Description("Trunk length(m)")]
        public double TrunkLength { get; set; }
        //root dry matter
        [Description("Fibrous root trunk ratio")]
        public double RootTrunkRatio { get; set; }
             
        //total nonstructural fraction in dry matter 
        [Description("Fibrous root nonstructural carbon fraction")]
        public double RootNSC { get; set; }

        [Description("Trunk nonstructural carbon fraction")]
        public double TrunkNSC { get; set; }

        [Description("Cane nonstructural carbon fraction")]
        public double CaneNSC { get; set; }

        [Description("Age of trees (in Years) at start of simulation)")]
        public int StartAge {get;set;}

        private RectangularZone RowZone {get; set;}

        [EventSubscribe("DoManagement")]
        private void OnDoManagement(object sender, EventArgs e)
        {
            if (Clock.Today.Date == SowingDate)
            {
                RowZone = this.Parent.Parent.Parent.FindInScope("Row") as RectangularZone;
                double pop = 1/RowZone.Width/VineDistance;  
                //sowing method
                Grapevine.Sow(cultivar: CultivarName,population: pop, 
                depth: 2000, rowSpacing: RowZone.Width, budNumber:BudNumber);
                double budsPerMeterRow = BudNumber/VineDistance; 
                zone.Set("[Grapevine].Structure.BudsPerMeterRow.FixedValue", budsPerMeterRow); 
                //cane biomass
                //calculate the biomass by length 1 meter time number of canes time wood density (0.5 g/mm2/m) * pop to covert the biomass into g/m2
                double woodDensity = 0.4; //g/mm2/m
                double CaneNumber = BudNumber/12; //recalculating cane number as we 
                double caneBiomass = 3.1415926*(CaneDiameter/2)*(CaneDiameter/2)*CaneLength*CaneNumber *woodDensity * pop; 
                double caneNSC = caneBiomass * CaneNSC;
                zone.Set("[Grapevine].Cane.CaneDiameter.FixedValue", CaneDiameter);
                zone.Set("[Grapevine].Cane.CaneLength.FixedValue", CaneLength);
                zone.Set("[Grapevine].Cane.CaneNumber.FixedValue", CaneNumber);

                zone.Set("[Grapevine].Cane.Live.StorageWt", caneNSC);                
                zone.Set("[Grapevine].Cane.Live.StructuralWt", caneBiomass - caneNSC);                

                //trunk biomass
                double trunkDensity = 0.5; //g/mm2/m
                double trunkBiomass = 3.1415926*(TrunkDiameter/2)*(TrunkDiameter/2)*TrunkLength *trunkDensity * pop; 
                double trunkNSC = trunkBiomass * TrunkNSC;

                zone.Set("[Grapevine].Trunk.TrunkDiameter.FixedValue", TrunkDiameter);
                zone.Set("[Grapevine].Trunk.TrunkLength.FixedValue", TrunkLength);

                zone.Set("[Grapevine].Trunk.Live.StorageWt", trunkNSC); 
                zone.Set("[Grapevine].Trunk.Live.StructuralWt", trunkBiomass - trunkNSC);              
                

                //Fibrous Root biomass is  per plant
                double rootBiomass = RootTrunkRatio * trunkBiomass; 
                double rootNSC = rootBiomass * RootNSC; 
                // zone.Set("[Grapevine].StructuralRoot.DMDemands.Structural.RootTrunkRatio",  RootTrunkRatio); 
                
                 zone.Set("[Grapevine].StructuralRoot.Live.StorageWt",    rootNSC ); //rootNSC*pop
                 zone.Set("[Grapevine].StructuralRoot.Live.StructuralWt", rootBiomass - rootNSC); 

                object StartAgeValue = StartAge;
                zone.Set("[Grapevine].Phenology.Age.Years",StartAgeValue);


            }
        }
    }
}
```
    RectangularZone Alley: Length=100; Width=1.5; Slope=0; AspectAngle=0; Altitude=50
      Report ReportAlley: EventNames=[Clock].DoReport
        VariableNames:
          [Clock].Today
          [Clock].Today.Year
          [Clock].Today.DayOfYear
          [Weather].DaysSinceWinterSolstice   as DAWS
          [PlantVariables].Script.Height 		as height
          [PlantVariables].Script.LAI         as lai
          [PlantVariables].Script.FRadInt     as f.rad.int
          [PlantVariables].Script.ET          as transpiration
          [PlantVariables].Script.ES          as Es
          [PlantVariables].Script.PET         as PET
          [PlantVariables].Script.RootDepth   as rootDepth
          [Soil].OutputLayers.SW
          sum([Soil].OutputLayers.SWmm)       as psw
          [Weather].Rain
          [Irrigation].IrrigationApplied
          [Soil].SoilWater.Drainage
      SurfaceOrganicMatter: InitialResidueName=wheat_stubble; InitialResidueType=wheat; InitialResidueMass=10; InitialStandingFraction=0; InitialCPR=0; InitialCNR=30
      Plant Slurp
      Fertiliser
      Irrigation
      Manager PastureInitialisation
        CultivarName = StaticCrop
        InitialRootDepth = 2000
        SowingDate = 02/25/2005 00:00:00
        RootDepth = 2000
        RFV = 10
        KLReductionFactor = -0.001
        KLReductionDepth = 150
        MaxG = 0.004
        R50 = 150
```csharp
using Models.Interfaces;
using Models.PMF.Organs;
using System;
using Models.Core;
using Models.PMF;
using APSIM.Shared.Utilities;
using Models.Soils;
        
namespace Models
{
    [Serializable] 
    [System.Xml.Serialization.XmlInclude(typeof(Model))]
    public class Script : Model
    {
        [Link] private Plant Slurp;
        [Link] private Clock Clock;
        [Link] private Soil Soil;
        [Link] private Zone zone;
        [Link(Type = LinkType.Path, Path = "[Slurp].Root")]
        private Root root;
        [Link]
        private IPhysical soilPhysical;

        [Display(Type = DisplayType.CultivarName)]
        [Description("Plant Type")]
        public string CultivarName { get; set; }
        [Description("Initial Root Depth")]
        public double InitialRootDepth { get; set; }
        [Description("Initialisation Date")]
        public DateTime SowingDate { get; set; }
        [Description("Maximum Root Depth")]
        public double RootDepth { get; set; }
        [Description("Roof Front Velocity")]
        public double RFV { get; set; }
        [Description("Factor to change Kl modifier with Depth")]
        public double KLReductionFactor { get; set; }
        [Description("Depth that KL starts to decline")]
        public double KLReductionDepth { get; set; }
        
        public double[] YKLModifiers { get; set; }
        public double[] XDepth { get; set; }
        private double Depth { get; set; }
        
        [Description("Maximum Stomatal Conductance")]
        public double MaxG { get; set; }
        [Description("Stomatal Radn response")]
        public double R50 { get; set; }
        
        [EventSubscribe("DoManagement")]
        private void OnDoManagement(object sender, EventArgs e)
        {
            if (Clock.Today.Date == SowingDate)
            {
                Slurp.Sow(cultivar: CultivarName, population: 1, depth: InitialRootDepth, rowSpacing: 150);
                
                YKLModifiers = new double[soilPhysical.Thickness.Length];
                XDepth = new double[soilPhysical.Thickness.Length];
                Depth = 0;
                for (int layer = 0; layer < soilPhysical.Thickness.Length; layer++)
                {
                    Depth += soilPhysical.Thickness[layer] / 2;  //Add half of the thickness of the current layer so depth is the mid depth of that layer
                    if (Depth <= KLReductionDepth)
                    {
                        YKLModifiers[layer] = 1;
                        XDepth[layer] = Depth;
                    }
                    else
                    {
                        double KLMod = 1 * Math.Exp(-KLReductionFactor * (Depth - KLReductionDepth));
                        YKLModifiers[layer] = KLMod;
                        XDepth[layer] = Depth;
                    }
                    Depth += soilPhysical.Thickness[layer] / 2;  //Add the other half of the current layer so depth is the top of the next layer
                }
                object KLMods = YKLModifiers;
                zone.Set("Slurp.Root.KLModifier.XYPairs.Y", KLMods);
                object Depths = XDepth;
                zone.Set("Slurp.Root.KLModifier.XYPairs.X", Depths);
                object RD = RootDepth;
                zone.Set("Slurp.Root.MaximumRootDepth.FixedValue", RD);
                object RV = RFV;
                zone.Set("Slurp.Root.RootFrontVelocity.Potential.FixedValue", RV);
                object GMaxValue = MaxG;
                zone.Set("Slurp.Leaf.Gsmax350", GMaxValue); 
                object R50Value = R50; 
                zone.Set("Slurp.Leaf.R50", R50Value); 
                
            }
        }
    }
}
```
      Manager SetPastureVariables
        Ext_coef = 0.6
        MaximumHeight = 300
        MinimumHeight = 100
```csharp
using Models.Soils;
using System.Data;
using APSIM.Shared.Utilities;
using System.Xml.Serialization;
using Models;
using Models.PMF;
using System.Text;
using System.Collections.Generic;
using Models.Core;
using System;
using Models.Climate;

namespace Models
{
    [Serializable] 
    //[System.Xml.Serialization.XmlInclude(typeof(Model))]
    public class Script : Model
    {
        [Link] Plant Slurp;
        [Link] Clock Clock;
        [Link] Zone zone;
        [Link] Weather weather;

        
        [Description("Extinction coefficient")]
        public  double Ext_coef { get; set; }
        [Description("Maximum height of leaves")]
        public double MaximumHeight { get; set; }
        [Description("Minimum height of leaves")]
        public double MinimumHeight { get; set; }
        
        public double Cover {get; private set;}
        public double LAI { get; private set; }
                
        [EventSubscribe("StartOfSimulation")]
        private void OnStartOfSimulation(object sender, EventArgs e)
        {
            Cover = 0.5;
        }
        
        [EventSubscribe("StartOfDay")]
        private void OnStartOfDay(object sender, EventArgs e)
        {
            Cover += weather.MeanT * 0.001;

            if (Cover >= 1.0)
            {
                Cover = 0.5;        
            }

              LAI = Math.Log(1 - Cover) / -Ext_coef;

            object LAIResetValue = LAI;
            zone.Set("Slurp.Leaf.Area.FixedValue", LAIResetValue);  
            object HeightResetValue = MinimumHeight + Cover * (MaximumHeight-MinimumHeight);
            zone.Set("Slurp.Leaf.Tallness.FixedValue", HeightResetValue);  
        }
    }
}
```
      Manager SetupPastureRootZones
        UseExtraZone = True
```csharp
using Models.Soils;
using Models.Functions;
using APSIM.Shared.Utilities;
using System.Xml.Serialization;
using Models;
using Models.PMF;
using System.Text;
using System.Collections.Generic;
using Models.Core;
using System;
using Models.PMF.Organs;

namespace Models
{
    [Serializable] 
    public class Script : Model
    {
        [Link] private Plant Slurp;
        [Link] private Clock Clock;
        [Link] private Zone zone;
        [Link(Type = LinkType.Path, Path = "[Slurp].Root")]
        private Root root;

        [Description("Use extra root zone")]
        public bool UseExtraZone { get; set; }

        
        [EventSubscribe("StartOfSimulation")]
        private void OnSimulationCommencing(object sender, EventArgs e)
        {
            if (UseExtraZone)
            {
            root.ZoneNamesToGrowRootsIn.Add("Row");
            root.ZoneRootDepths.Add(600);
NutrientPoolFunctions InitialDM = new NutrientPoolFunctions();
Constant InitStruct = new Constant();
InitStruct.FixedValue = 10;
InitialDM.Structural = InitStruct;
Constant InitMetab = new Constant();
InitMetab.FixedValue = 0;
InitialDM.Metabolic = InitMetab;
Constant InitStor = new Constant();
InitStor.FixedValue = 0;
InitialDM.Storage = InitStor;
            root.ZoneInitialDM.Add(InitialDM);

            }
        }
    }
}
```
      Operations WinterRainfall
        2002-05-28  [Irrigation].Apply(200);
      Manager PlantVariables
```csharp
using Models.Soils;
using System;
using Models.Core;

namespace Models
{
    [Serializable]
    public class Script : Model
    {
        
    }
}
```
      Manager Reset on date: same as Replacements.Reset on date
      Soil: same as Vineyard.Row.Soil
