Simulations: Version=57
  Memo Notes on the ClimateController
    The purpose of the “ClimateController” Manager component is to modify the daily weather supplied to the simulation before any other components use the data.  It can be used, for example:

    * to approximate climate change by adding a few degrees of temperature to MinT and MaxT;
    * to 'correct' a weather file if the rainfall or temerature is known to be not quite appropriate for a location;
    * create a heat stress event by modifying temperatures for a short defined period of time;
    * create a drought by setting Rain to zero for a period of time.

    Of course many other possibilities exist.  See the testing below for various ways of interacting with the ClimateController component.

    **General parameters**:

    * *AllowControl*, “Enable?” – enables or not the whole component
    * *EnableDate*, “Start the climate controls beginning on date (dd/mmm/yyyy): ” – if this date is greater than the simulation start date then the climate controls will only be applied on and after this date.  This date can appear part way through a within-year control window (see below).
    * *WithinYearControl*, “Implement climate control only during part of the year?")] ” – if the controls are to be applied during only part of a year (e.g. warming up the winter months) then set this to Yes and then set appropriate dates for the next two parameters
    * *ControlStart*, “Within each year, the first day to start the climate controls is (dd-mmm)")] Within each year, end last day of climate control is (dd-mmm)” – the date without a year (e.g. 15-mar) that is the first day that the climate controls will start if WithinYearControl is set to Yes
    * *ControlEnd*, “” – the date without a year (e.g. 30-apr) that is the last day of climate controls if WithinYearControl is set to Yes

    Weather parameters:

    * *RainfallMultiplier*, “Rainfall multiplier (-)” – the value by which to multiply the value of rain from the weather file, set <1 to decrease rainfall, =1 to have no effect, and >1 to increase rainfall
    * *RainfallAddition*, “Rainfall addition (mm)” – the value to add to the value of rain from the weather file, set <0 to decrease rainfall, =0 to have no effect, and >0 to increase rainfall

    And as above but for other weather variables:

    * RadiationMultiplier
    * RadiationAddition
    * MinTMultiplier
    * MinTAddition
    * MaxTMultiplier
    * MaxTAddition
    * WindMultiplier
    * WindAddition
    * VPMultiplier
    * VPAddition

    Limitations:

    * the component makes no checks at all about the validity of the changes (e.g. Radiation can be set bit be negative)
    * there is currently no year-on-year change allowed (e.g. temperatures increasing by an increasing percentage each year compared to the base weather file)
    * it should be possible to have more than one ClimateController component in the simulation to create more complex patterns but this has not been tested
  DataStore
  Folder TestClimateControlSettings
    Memo Tests of the general settings
      This series of simulations tests that:

      * That disabling or enabling the whole component works (CompletelyOff)
      * Enabling the start of any climate control works (EnableFrom01Jan, EnableFrom05Jan, EnableFrom15Jan)
      * That the within-year window of control works (WithinYearControl)
      * That the start of any climate control works properly with a winthin-year window (WithinYearControlAndEnableDate)
    Experiment ClimateControlTestSettings
      Factors
        Factor ClimateScenarios
          CompositeFactor CompletelyOff: Specifications=[ClimateController].Script.AllowControl=false
          CompositeFactor EnableFrom01Jan
            Specifications:
              [ClimateController].Script.AllowControl=true
              [ClimateController].Script.EnableDate=1980-1-01
              [ClimateController].Script.WithinYearControl=false
          CompositeFactor EnableFrom05Jan
            Specifications:
              [ClimateController].Script.AllowControl=true
              [ClimateController].Script.EnableDate=1980-1-05
              [ClimateController].Script.WithinYearControl=false
          CompositeFactor EnableFrom15Jan
            Specifications:
              [ClimateController].Script.AllowControl=true
              [ClimateController].Script.EnableDate=1980-1-15
              [ClimateController].Script.WithinYearControl=false
          CompositeFactor WithinYearControl
            Specifications:
              [ClimateController].Script.AllowControl=true
              [ClimateController].Script.EnableDate=1980-1-01
              [ClimateController].Script.WithinYearControl=true
              [ClimateController].Script.ControlStart=05-jan
              [ClimateController].Script.ControlEnd=25-jan
          CompositeFactor WithinYearControlAndEnableDate
            Specifications:
              [ClimateController].Script.AllowControl=true
              [ClimateController].Script.EnableDate=1980-1-10
              [ClimateController].Script.WithinYearControl=true
              [ClimateController].Script.ControlStart=05-jan
              [ClimateController].Script.ControlEnd=25-jan
      Simulation ClimateControl
        Clock: StartDate=1980-01-01; EndDate=1981-01-31
        Weather: FileName=%root%\Examples\WeatherFiles\lincoln.met
        Manager ClimateController
          AllowControl = True
          EnableDate = 1980-01-15
          WithinYearControl = False
          ControlStart = 15-jan
          ControlEnd = 20-jan
          RainfallMultiplier = 0
          RainfallAddition = 15
          RadiationMultiplier = 0
          RadiationAddition = 45
          MinTMultiplier = 0
          MinTAddition = 35
          MaxTMultiplier = 0
          MaxTAddition = 65
          WindMultiplier = 0
          WindAddition = 15
          VPMultiplier = 0
          VPAddition = 30
```csharp
using System;
using System.Xml.Serialization;
using Models.Core;
using Models.PMF;
using Models.Soils;
using Models.Soils.Nutrients;
using APSIM.Shared.Utilities;

namespace Models
{
    [Serializable]
    public class Script : Model
    {
        // - Links to APSIM models
        [Link] Zone zone;
        [Link] Clock clock;
        [Link] Weather weather;
        [Link] ISummary summary = null;

        // - Paramters for this manager
        [Description("Enable? Set to 'No' to completely disable this manager")] public bool AllowControl { get; set; }

        [Separator("General settings")]
        [Description("Start the climate controls beginning on date (dd/mmm/yyyy): ")] public DateTime EnableDate { get; set; }
        [Description("Implement climate control only during part of the year?")] public bool WithinYearControl { get; set; }
        [Description("Within each year, the first day to start the climate controls is (dd-mmm)")] public string ControlStart { get; set; }
        [Description("Within each year, end last day of climate control is (dd-mmm)")] public string ControlEnd { get; set; }

        [Separator("Rainfall")]
        [Description("Rainfall multiplier (-): ")] public double RainfallMultiplier { get; set; }
        [Description("Rainfall addition (mm): ")] public double RainfallAddition { get; set; }

        [Separator("Radiation")]
        [Description("Radiation multiplier (-): ")] public double RadiationMultiplier { get; set; }
        [Description("Radiation addition (MJ/m2): ")] public double RadiationAddition { get; set; }

        [Separator("Minimum temperature")]
        [Description("Minimum temperature multiplier (-): ")] public double MinTMultiplier { get; set; }
        [Description("Minimum temperature addition (C): ")] public double MinTAddition { get; set; }

        [Separator("Maximum temperature")]
        [Description("Maximum temperature multiplier (-): ")] public double MaxTMultiplier { get; set; }
        [Description("Maximum temperature addition (C): ")] public double MaxTAddition { get; set; }

        [Separator("Wind speed")]
        [Description("Wind speed multiplier (-): ")] public double WindMultiplier { get; set; }
        [Description("Wind speed addition (m/s): ")] public double WindAddition { get; set; }

        [Separator("Vapour pressure")]
        [Description("Vapour pressure multiplier (-): ")] public double VPMultiplier { get; set; }
        [Description("Vapour pressure addition (hPa): ")] public double VPAddition { get; set; }

        [XmlIgnore] public bool DoControl { get; set; }
        [XmlIgnore] public int DoControlInt { get; set; }

        [EventSubscribe("PreparingNewWeatherData")] private void OnDoManagement(object sender, EventArgs e)
        {
            // Check if this manager is enabled
            if ((AllowControl) && (clock.Today >= EnableDate))
            {
                DoControl = true;
                if (WithinYearControl)
                    DoControl = DateUtilities.WithinDates(ControlStart, clock.Today, ControlEnd); 
            }

            if (DoControl)
                DoControlInt = 1;
            else
                DoControlInt = 0;

            if (DoControl)
            {
                // do the weather alterations 
                weather.Rain = RainfallMultiplier * weather.Rain + RainfallAddition;
                weather.Radn = RadiationMultiplier * weather.Radn + RadiationAddition;
                weather.MinT = MinTMultiplier * weather.MinT + MinTAddition;
                weather.MaxT = MaxTMultiplier * weather.MaxT + MaxTAddition;
                weather.Wind = WindMultiplier * weather.Wind + WindAddition;
                weather.VP = VPMultiplier * weather.VP + VPAddition;
            }
        }
    }
}
```
        Summary
        SoilArbitrator
        Zone Field: Area=1; Slope=0
          MicroClimate: a_interception=0; b_interception=0; c_interception=0.55; d_interception=0; soil_albedo=0.23; SoilHeatFluxFraction=0.4; NightInterceptionFraction=0.5; ReferenceHeight=2
          Irrigation
          Fertiliser
          SurfaceOrganicMatter: InitialResidueName=Sward; InitialResidueType=grass; InitialResidueMass=1000; InitialStandingFraction=0; InitialCPR=0; InitialCNR=15; FractionFaecesAdded=0.5
          Soil LismoreSoil: SoilType=NZ_Sedimentary; LocalName=Lismore; Site=Winchmore; NearestTown=Ashburton; Region=Canterbury; Country=New Zealand; Latitude=-48.48; Longitude=0
            Analysis: PHUnits=Water; BoronUnits=0
              Thickness  Rocks  PH  CEC   ParticleSizeSand  ParticleSizeSilt  ParticleSizeClay
              150        0      6   12.5  15                65                20
              150        0      6   10    20                65                15
              200        10     6   9     25                63                12
              150        40     6   5     35                57                8
              250        60     6   4     40                54                6
              300        70     6   4     40                55                5
              300        70     6   4     40                55                5
            Water
              Thickness  BD    AirDry  LL15   DUL    SAT   KS
              150        1.3   0.05    0.15   0.36   0.45  5000
              150        1.35  0.12    0.14   0.34   0.43  2500
              200        1     0.055   0.055  0.19   0.25  3000
              150        0.53  0.015   0.015  0.065  0.15  10000
              250        0.31  0.01    0.01   0.04   0.11  17500
              300        0.3   0.01    0.01   0.03   0.11  20000
              300        0.3   0.01    0.01   0.03   0.11  20000
              SoilCrop SwardSoil: LL=[0.15, 0.14, 0.06, 0.02, 0.01, 0.01, 0.01]; KL=[0.1, 0.1, 0.08, 0.04, 0.01, 0, 0]; XF=[1, 1, 1, 1, 1, 0, 0]
              SoilCrop RyegrassSoil: LL=[0.15, 0.14, 0.06, 0.02, 0.01, 0.01, 0.01]; KL=[0.1, 0.1, 0.08, 0.04, 0.01, 0, 0]; XF=[1, 1, 1, 1, 1, 0, 0]
              SoilCrop WhiteCloverSoil: LL=[0.15, 0.14, 0.06, 0.02, 0.01, 0.01, 0.01]; KL=[0.1, 0.1, 0.08, 0.04, 0.01, 0, 0]; XF=[1, 1, 1, 1, 1, 0, 0]
            SoilWater: SummerDate=1-Nov; SummerU=6; SummerCona=3.5; WinterDate=1-apr; WinterU=2; WinterCona=2; DiffusConst=88; DiffusSlope=35; Salb=0.13; CN2Bare=73; CNRed=20; CNCov=0.8; slope=0; discharge_width=0; catchment_area=0; max_pond=0; ResidueInterception=0
              Thickness  SWCON  KLAT
              150        0.5    0
              150        0.52   0
              200        0.55   0
              150        0.6    0
              250        0.65   0
              300        0.65   0
              300        0.65   0
            SoilOrganicMatter: RootCN=40; EnrACoeff=7.4; EnrBCoeff=0.2; OCUnits=Total
              Thickness  OC    SoilCN  FBiom  FInert  RootWt
              150        3     12      0.04   0.5     331.337
              150        1     12      0.02   0.7     245.461
              200        0.6   12      0.02   0.83    164.537
              150        0.4   12      0.01   0.9     121.892
              250        0.25  12      0.01   0.95    73.9313
              300        0.15  12      0      0.99    40.5743
              300        0.1   12      0      0.99    22.2677
            InitialWater Initial water: PercentMethod=1; FractionFull=0.95
            Sample Initial nitrogen: NO3Units=ppm; NH4Units=ppm; SWUnits=Volumetric; OCUnits=Total; PHUnits=Water
              Thickness  NO3   NH4
              150        5     0.1
              150        2.5   0.1
              200        1     0.1
              150        0.75  0.1
              250        0.5   0.1
              300        0.5   0.1
              300        0.5   0.1
            CERESSoilTemperature
            Nutrient
              DirectedGraphInfo={Nodes=[{Name=Inert, OutlineColour=Black}, {Name=SurfaceResidue, OutlineColour=Black}, {Name=FOMLignin, OutlineColour=Black}, {Name=FOMCellulose, OutlineColour=Black}, {Name=FOMCarbohydrate, OutlineColour=Black}, {Name=Microbial, OutlineColour=Black}, {Name=Humic, OutlineColour=Black}, {Name=Urea, OutlineColour=Black}, {Name=NO3, OutlineColour=Black}, {Name=NH4, OutlineColour=Black}, {Name=Atmosphere, OutlineColour=White}, {Name=PlantAvailableNO3, OutlineColour=Black}, {Name=PlantAvailableNH4, OutlineColour=Black}], Arcs=[{SourceName=SurfaceResidue, DestinationName=Microbial}, {SourceName=SurfaceResidue, DestinationName=Humic}, {SourceName=FOMLignin, DestinationName=Microbial}, {SourceName=FOMLignin, DestinationName=Humic}, {SourceName=FOMCellulose, DestinationName=Microbial}, {SourceName=FOMCellulose, DestinationName=Humic}, {SourceName=FOMCarbohydrate, DestinationName=Microbial}, {SourceName=FOMCarbohydrate, DestinationName=Humic}, {SourceName=Microbial, DestinationName=Microbial}, {SourceName=Microbial, DestinationName=Humic}, {SourceName=Humic, DestinationName=Microbial}, {SourceName=Urea, DestinationName=NH4}, {SourceName=NO3, DestinationName=Atmosphere}, {SourceName=NH4, DestinationName=NO3}]}
          Report Results: EventNames=[Clock].EndOfDay
            VariableNames:
              [Clock].Today as Date
              [Weather].Rain
              [Weather].Radn
              [Weather].MaxT
              [Weather].MinT
              [Weather].Wind
              [Weather].VP
              [ClimateController].Script.doControl as doControl
              [ClimateController].Script.doControlInt as doControlInt
  Folder TestClimateControlValues
    Memo Tests of the climate settings
      This series of simulations tests that the mulitpliers and additions to the various climate elements have been properly enabled.  There are four combinations tested:

      * The unmodified weather file (NoControl)
      * Multiply by 0 and add 0 so that the parameter value will be 0 (Mult0Add0)
      * Multiply by 0 and add 20 so that the parameter value will be 20 (Mult0Add20)
      * Multiply by 0.5 and add 0 so that the parameter value will be half that in the weather file (Mult0Add20)
    Experiment ClimateControlTestValues
      Factors
        Factor ClimateScenarios
          CompositeFactor NoControl
            Specifications:
              [ClimateController].Script.AllowControl=false
              [ClimateController].Script.EnableDate=1980-1-01
              [ClimateController].Script.WithinYearControl=false
              [ClimateController].Script.RainfallMultiplier=0
              [ClimateController].Script.RainfallAddition=0
              [ClimateController].Script.RadiationMultiplier=0
              [ClimateController].Script.RadiationAddition=0
              [ClimateController].Script.MinTMultiplier=0
              [ClimateController].Script.MinTAddition=0
              [ClimateController].Script.MaxTMultiplier=0
              [ClimateController].Script.MaxTAddition=0
              [ClimateController].Script.WindMultiplier=0
              [ClimateController].Script.WindAddition=0
              [ClimateController].Script.VPMultiplier=0
              [ClimateController].Script.VPAddition=0
          CompositeFactor Mult0Add0
            Specifications:
              [ClimateController].Script.AllowControl=true
              [ClimateController].Script.EnableDate=1980-1-01
              [ClimateController].Script.WithinYearControl=false
              [ClimateController].Script.RainfallMultiplier=0
              [ClimateController].Script.RainfallAddition=0
              [ClimateController].Script.RadiationMultiplier=0
              [ClimateController].Script.RadiationAddition=0
              [ClimateController].Script.MinTMultiplier=0
              [ClimateController].Script.MinTAddition=0
              [ClimateController].Script.MaxTMultiplier=0
              [ClimateController].Script.MaxTAddition=0
              [ClimateController].Script.WindMultiplier=0
              [ClimateController].Script.WindAddition=0
              [ClimateController].Script.VPMultiplier=0
              [ClimateController].Script.VPAddition=0
          CompositeFactor Mult0Add20
            Specifications:
              [ClimateController].Script.AllowControl=true
              [ClimateController].Script.EnableDate=1980-1-01
              [ClimateController].Script.WithinYearControl=false
              [ClimateController].Script.RainfallMultiplier=0
              [ClimateController].Script.RainfallAddition=20
              [ClimateController].Script.RadiationMultiplier=0
              [ClimateController].Script.RadiationAddition=20
              [ClimateController].Script.MinTMultiplier=0
              [ClimateController].Script.MinTAddition=20
              [ClimateController].Script.MaxTMultiplier=0
              [ClimateController].Script.MaxTAddition=20
              [ClimateController].Script.WindMultiplier=0
              [ClimateController].Script.WindAddition=20
              [ClimateController].Script.VPMultiplier=0
              [ClimateController].Script.VPAddition=20
          CompositeFactor MultHalfAdd0
            Specifications:
              [ClimateController].Script.AllowControl=true
              [ClimateController].Script.EnableDate=1980-1-01
              [ClimateController].Script.WithinYearControl=false
              [ClimateController].Script.RainfallMultiplier=0.5
              [ClimateController].Script.RainfallAddition=0
              [ClimateController].Script.RadiationMultiplier=0.5
              [ClimateController].Script.RadiationAddition=0
              [ClimateController].Script.MinTMultiplier=0.5
              [ClimateController].Script.MinTAddition=0
              [ClimateController].Script.MaxTMultiplier=0.5
              [ClimateController].Script.MaxTAddition=0
              [ClimateController].Script.WindMultiplier=0.5
              [ClimateController].Script.WindAddition=0
              [ClimateController].Script.VPMultiplier=0.5
              [ClimateController].Script.VPAddition=0
      Simulation ClimateControl1: same as TestClimateControlSettings.ClimateControlTestSettings.ClimateControl
  Folder PracticalTest
    Memo A test showing a practical example
      This test has two simulations.  The first is DalbyWheat with unmodified rainfall and in the second the rainfall is doubled.
    Simulation DalbyWheatNormalRainfall
      Clock: StartDate=1990-01-01; EndDate=1995-12-31
      Summary SummaryFile
      Weather: FileName=%root%\Examples\WeatherFiles\Dalby.met
      SoilArbitrator
      Zone Field: Area=1; Slope=0
        Report: EventNames=[Wheat].Harvesting
          VariableNames:
            [Clock].Today
            [Wheat].Phenology.Zadok.Stage
            [Wheat].Phenology.CurrentStageName
            [Wheat].AboveGround.Wt
            [Wheat].AboveGround.N
            [Wheat].Grain.Total.Wt*10 as Yield
            [Wheat].Grain.Protein
            [Wheat].Grain.Size
            [Wheat].Grain.Number
            [Wheat].Grain.Total.Wt
            [Wheat].Grain.Total.N
            [Wheat].Total.Wt
        Fertiliser
        Soil: ASCOrder=Vertosol; ASCSubOrder=Black; SoilType=Clay; Site=Norwin; NearestTown=Norwin; Region=Darling Downs and Granite Belt; State=Queensland; Country=Australia; NaturalVegetation=Qld. Bluegrass, possible Qld. Blue gum; ApsoilNumber=900; Latitude=-27.581836; Longitude=151.320206; LocationAccuracy=+/- 20m
          DataSource=CSIRO Sustainable Ecosystems, Toowoomba; Characteriesd as part of the GRDC funded project"Doing it better, doing it smarter, managing soil water in Australian agriculture' 2011
          Comments=OC, CLL for all crops estimated-based on Bongeen Mywybilla Soil No1
          Water
            Thickness  BD       AirDry    LL15      DUL       SAT       KS
            150        1.01056  0.13025   0.2605    0.521     0.588655  20
            150        1.07146  0.198689  0.248362  0.496723  0.565677  20
            300        1.09394  0.28      0.28      0.488438  0.557193  20
            300        1.15861  0.28      0.28      0.480297  0.532787  20
            300        1.17301  0.28      0.28      0.471584  0.527354  20
            300        1.16287  0.28      0.28      0.457071  0.53118   20
            300        1.1875   0.28      0.28      0.452332  0.521888  20
            SoilCrop WheatSoil: LL=[0.261, 0.248, 0.28, 0.306, 0.36, 0.392, 0.446]; KL=[0.06, 0.06, 0.06, 0.04, 0.04, 0.02, 0.01]; XF=[1, 1, 1, 1, 1, 1, 1]
          SoilWater: SummerDate=1-Nov; SummerU=5; SummerCona=5; WinterDate=1-Apr; WinterU=5; WinterCona=5; DiffusConst=40; DiffusSlope=16; Salb=0.12; CN2Bare=73; CNRed=20; CNCov=0.8; max_pond=0; Thickness=[150, 150, 300, 300, 300, 300, 300]; SWCON=[0.3, 0.3, 0.3, 0.3, 0.3, 0.3, 0.3]; ResidueInterception=0
          SoilOrganicMatter: RootCN=40; EnrACoeff=7.4; EnrBCoeff=0.2; OCUnits=Total
            Thickness  OC    SoilCN  FBiom  FInert  RootWt
            150        1.2   12      0.04   0.4     347.129
            150        0.96  12      0.02   0.6     270.344
            300        0.6   12      0.02   0.8     163.972
            300        0.3   12      0.02   1       99.4541
            300        0.18  12      0.01   1       60.322
            300        0.12  12      0.01   1       36.5871
            300        0.12  12      0.01   1       22.1912
          Analysis: Thickness=[150, 150, 300, 300, 300, 300, 300]; PH=[8, 8, 8, 8, 8, 8, 8]; PHUnits=Water; BoronUnits=0
          InitialWater: PercentMethod=1; FractionFull=1
          Sample InitialN: NO3Units=ppm; NH4Units=ppm; SWUnits=Volumetric; OCUnits=Total; PHUnits=Water
            Thickness  NO3  NH4
            150        1    0.1
            150        1    0.1
            300        1    0.1
            300        1    0.1
            300        1    0.1
            300        1    0.1
            300        1    0.1
          CERESSoilTemperature
          Nutrient: same as TestClimateControlSettings.ClimateControlTestSettings.ClimateControl.Field.LismoreSoil.Nutrient
        SurfaceOrganicMatter: InitialResidueName=wheat_stubble; InitialResidueType=wheat; InitialResidueMass=500; InitialStandingFraction=0; InitialCPR=0; InitialCNR=100; FractionFaecesAdded=0.5
        Plant Wheat: CropType=Wheat; IsEnding=false; DaysAfterEnding=0
        MicroClimate: a_interception=0; b_interception=1; c_interception=0.55; d_interception=0; soil_albedo=0.3; SoilHeatFluxFraction=0.4; NightInterceptionFraction=0.5; ReferenceHeight=2
        Manager SowingFertiliser
          Amount = 160
          CropName = wheat
```csharp
using System;
using Models.Core;
using Models.PMF;
namespace Models
{
    [Serializable]
    public class Script : Model
    {
        [Link] Clock Clock;
        [Link] Fertiliser Fertiliser;
        [Link] Summary Summary;
        
        
        [Description("Amount of fertiliser to be applied (kg/ha)")]
        public double Amount { get; set;}
        
        [Description("Crop to be fertilised")]
        public string CropName { get; set;}
        
        
        

        [EventSubscribe("Sowing")]
        private void OnSowing(object sender, EventArgs e)
        {
            Model crop = sender as Model;
            if (crop.Name.ToLower()==CropName.ToLower())
                Fertiliser.Apply(Amount: Amount, Type: Fertiliser.Types.NO3N);
        }
        
    }
}
```
        Manager Harvest
```csharp
using System;
using Models.Core;
using Models.PMF;
using Models.Soils;
using Models.Soils.Nutrients;
using Models.Utilities;
using APSIM.Shared.Utilities;

namespace Models
{
    [Serializable]
    public class Script : Model
    {
        [Link] Plant Wheat;

        [EventSubscribe("DoManagement")]
        private void OnDoManagement(object sender, EventArgs e)
        {
            if (Wheat.IsReadyForHarvesting)
            {
               Wheat.Harvest();
               Wheat.EndCrop();    
            }
        
        }
        
    }
}
```
        Manager SowingRule1
          StartDate = 1-may
          EndDate = 10-jul
          MinESW = 100
          MinRain = 5
          RainDays = 7
          CultivarName = Hartog
          SowingDepth = 30
          RowSpacing = 250
          Population = 120
```csharp
using System;
using Models.Core;
using Models.PMF;
using Models.Soils;
using Models.Soils.Nutrients;
using Models.Utilities;
using APSIM.Shared.Utilities;

namespace Models
{
    [Serializable]
    public class Script : Model
    {
        [Link] Clock Clock;
        [Link] Fertiliser Fertiliser;
        [Link] Summary Summary;
        [Link] Plant Wheat;
        [Link] Soil Soil; 
        Accumulator accumulatedRain;
        
        [Description("Start of sowing window (d-mmm)")]
        public string StartDate { get; set;}
        [Description("End of sowing window (d-mmm)")]
        public string EndDate { get; set;}
        [Description("Minimum extractable soil water for sowing (mm)")]
        public double MinESW { get; set;}
        [Description("Accumulated rainfall required for sowing (mm)")]
        public double MinRain { get; set;}
        [Description("Duration of rainfall accumulation (d)")]
        public int RainDays { get; set;}
        [Description("Cultivar to be sown")]
        [Display(Type=DisplayType.CultivarName)]
        public string CultivarName { get; set;}
        [Description("Sowing depth (mm)")]
        public double SowingDepth { get; set;}        
        [Description("Row spacing (mm)")]
        public double RowSpacing { get; set;}    
        [Description("Plant population (/m2)")]
        public double Population { get; set;}    
        
        
        [EventSubscribe("Commencing")]
        private void OnSimulationCommencing(object sender, EventArgs e)
        {
            accumulatedRain = new Accumulator(this, "[Weather].Rain", RainDays);
        }
        

        [EventSubscribe("DoManagement")]
        private void OnDoManagement(object sender, EventArgs e)
        {
            accumulatedRain.Update();
            
            if (DateUtilities.WithinDates(StartDate,Clock.Today,EndDate) &&
                !Wheat.IsAlive &&
                MathUtilities.Sum(Soil.SoilWater.ESW) > MinESW &&
                accumulatedRain.Sum > MinRain)
            {
               Wheat.Sow(population:Population, cultivar:CultivarName, depth:SowingDepth, rowSpacing:RowSpacing);    
            }
        
        }
        
    }
}
```
    Simulation DalbyWheatDoubleRainfall
      Clock: StartDate=1990-01-01; EndDate=1995-12-31
      Summary SummaryFile
      Weather: FileName=%root%\Examples\WeatherFiles\Dalby.met
      Manager ClimateController
        AllowControl = True
        EnableDate = 1990-01-01
        WithinYearControl = False
        ControlStart = 01-jan
        ControlEnd = 31-dec
        RainfallMultiplier = 2
        RainfallAddition = 0
        RadiationMultiplier = 1
        RadiationAddition = 0
        MinTMultiplier = 1
        MinTAddition = 0
        MaxTMultiplier = 1
        MaxTAddition = 0
        WindMultiplier = 1
        WindAddition = 0
        VPMultiplier = 1
        VPAddition = 0
        script: same as in TestClimateControlSettings.ClimateControlTestSettings.ClimateControl.ClimateController
      SoilArbitrator
      Zone Field: same as PracticalTest.DalbyWheatNormalRainfall.Field
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