Simulations: Version=31
  Morris
    simulationNames=[MorrisCONA5.263158CN277.89474, MorrisCONA10CN277.89474, MorrisCONA10CN246.31579, MorrisCONA1.947368CN284.21053, MorrisCONA1.947368CN252.63158, MorrisCONA6.68421CN252.63158, MorrisCONA2.421053CN249.47368, MorrisCONA2.421053CN281.05264, MorrisCONA7.157895CN281.05264, MorrisCONA1CN265.26316, MorrisCONA5.736842CN265.26316, MorrisCONA5.736842CN296.8421, MorrisCONA5.263158CN277.89474, MorrisCONA5.263158CN246.31579, MorrisCONA10CN246.31579, MorrisCONA10CN271.57895, MorrisCONA5.263158CN271.57895, MorrisCONA5.263158CN240, MorrisCONA9.526316CN249.47368, MorrisCONA9.526316CN281.05264, MorrisCONA4.789474CN281.05264, MorrisCONA4.789474CN281.05264, MorrisCONA4.789474CN249.47368, MorrisCONA9.526316CN249.47368, MorrisCONA5.736842CN296.8421, MorrisCONA1CN296.8421, MorrisCONA1CN265.26316, MorrisCONA1CN293.68421, MorrisCONA1CN262.10526, MorrisCONA5.736842CN262.10526, MorrisCONA9.526316CN246.31579, MorrisCONA9.526316CN277.89474, MorrisCONA4.789474CN277.89474, MorrisCONA7.631579CN262.10526, MorrisCONA7.631579CN293.68421, MorrisCONA2.894737CN293.68421, MorrisCONA4.31579CN243.15789, MorrisCONA4.31579CN274.73684, MorrisCONA9.052631CN274.73684, MorrisCONA10CN284.21053, MorrisCONA10CN252.63158, MorrisCONA5.263158CN252.63158, MorrisCONA4.789474CN274.73684, MorrisCONA4.789474CN243.15789, MorrisCONA9.526316CN243.15789, MorrisCONA9.052631CN268.42105, MorrisCONA9.052631CN2100, MorrisCONA4.31579CN2100, MorrisCONA8.105263CN2100, MorrisCONA3.368421CN2100, MorrisCONA3.368421CN268.42105, MorrisCONA5.263158CN258.94737, MorrisCONA5.263158CN290.52631, MorrisCONA10CN290.52631, MorrisCONA6.68421CN284.21053, MorrisCONA6.68421CN252.63158, MorrisCONA1.947368CN252.63158, MorrisCONA8.578947CN255.78947, MorrisCONA3.842105CN255.78947, MorrisCONA3.842105CN287.36842, MorrisCONA8.105263CN271.57895, MorrisCONA8.105263CN240, MorrisCONA3.368421CN240, MorrisCONA9.052631CN274.73684, MorrisCONA9.052631CN243.15789, MorrisCONA4.31579CN243.15789, MorrisCONA5.263158CN287.36842, MorrisCONA5.263158CN255.78947, MorrisCONA10CN255.78947, MorrisCONA7.631579CN290.52631, MorrisCONA7.631579CN258.94737, MorrisCONA2.894737CN258.94737, MorrisCONA6.210526CN268.42105, MorrisCONA6.210526CN2100, MorrisCONA1.473684CN2100, MorrisCONA6.68421CN262.10526, MorrisCONA1.947368CN262.10526, MorrisCONA1.947368CN293.68421, MorrisCONA7.157895CN271.57895, MorrisCONA7.157895CN240, MorrisCONA2.421053CN240, MorrisCONA9.526316CN277.89474, MorrisCONA4.789474CN277.89474, MorrisCONA4.789474CN246.31579, MorrisCONA3.842105CN240, MorrisCONA8.578947CN240, MorrisCONA8.578947CN271.57895, MorrisCONA3.368421CN249.47368, MorrisCONA3.368421CN281.05264, MorrisCONA8.105263CN281.05264, MorrisCONA1.473684CN281.05264, MorrisCONA6.210526CN281.05264, MorrisCONA6.210526CN249.47368, MorrisCONA1CN258.94737, MorrisCONA5.736842CN258.94737, MorrisCONA5.736842CN290.52631, MorrisCONA3.368421CN274.73684, MorrisCONA8.105263CN274.73684, MorrisCONA8.105263CN243.15789, MorrisCONA6.210526CN281.05264, MorrisCONA1.473684CN281.05264, MorrisCONA1.473684CN249.47368, MorrisCONA6.68421CN240, MorrisCONA1.947368CN240, MorrisCONA1.947368CN271.57895, MorrisCONA4.789474CN296.8421, MorrisCONA9.526316CN296.8421, MorrisCONA9.526316CN265.26316, MorrisCONA2.421053CN2100, MorrisCONA7.157895CN2100, MorrisCONA7.157895CN268.42105, MorrisCONA6.210526CN277.89474, MorrisCONA1.473684CN277.89474, MorrisCONA1.473684CN246.31579, MorrisCONA4.31579CN277.89474, MorrisCONA9.052631CN277.89474, MorrisCONA9.052631CN246.31579, MorrisCONA7.631579CN287.36842, MorrisCONA2.894737CN287.36842, MorrisCONA2.894737CN255.78947, MorrisCONA3.368421CN281.05264, MorrisCONA3.368421CN249.47368, MorrisCONA8.105263CN249.47368, MorrisCONA9.052631CN284.21053, MorrisCONA4.31579CN284.21053, MorrisCONA4.31579CN252.63158, MorrisCONA5.736842CN265.26316, MorrisCONA5.736842CN296.8421, MorrisCONA1CN296.8421, MorrisCONA1CN287.36842, MorrisCONA5.736842CN287.36842, MorrisCONA5.736842CN255.78947, MorrisCONA1.473684CN252.63158, MorrisCONA1.473684CN284.21053, MorrisCONA6.210526CN284.21053, MorrisCONA5.736842CN243.15789, MorrisCONA5.736842CN274.73684, MorrisCONA1CN274.73684, MorrisCONA2.894737CN277.89474, MorrisCONA2.894737CN246.31579, MorrisCONA7.631579CN246.31579, MorrisCONA1.473684CN268.42105, MorrisCONA6.210526CN268.42105, MorrisCONA6.210526CN2100, MorrisCONA8.578947CN290.52631, MorrisCONA3.842105CN290.52631, MorrisCONA3.842105CN258.94737, MorrisCONA7.631579CN265.26316, MorrisCONA7.631579CN296.8421, MorrisCONA2.894737CN296.8421, MorrisCONA7.631579CN252.63158, MorrisCONA7.631579CN284.21053, MorrisCONA2.894737CN284.21053, MorrisCONA1.473684CN243.15789, MorrisCONA6.210526CN243.15789, MorrisCONA6.210526CN274.73684, MorrisCONA2.894737CN258.94737, MorrisCONA7.631579CN258.94737, MorrisCONA7.631579CN290.52631, MorrisCONA4.789474CN258.94737, MorrisCONA4.789474CN290.52631, MorrisCONA9.526316CN290.52631, MorrisCONA1CN268.42105, MorrisCONA5.736842CN268.42105, MorrisCONA5.736842CN2100, MorrisCONA7.631579CN281.05264, MorrisCONA2.894737CN281.05264, MorrisCONA2.894737CN249.47368, MorrisCONA6.68421CN249.47368, MorrisCONA1.947368CN249.47368, MorrisCONA1.947368CN281.05264, MorrisCONA2.894737CN243.15789, MorrisCONA7.631579CN243.15789, MorrisCONA7.631579CN274.73684, MorrisCONA4.789474CN271.57895, MorrisCONA4.789474CN240, MorrisCONA9.526316CN240, MorrisCONA10CN258.94737, MorrisCONA10CN290.52631, MorrisCONA5.263158CN290.52631, MorrisCONA5.736842CN296.8421, MorrisCONA5.736842CN265.26316, MorrisCONA1CN265.26316, MorrisCONA8.105263CN284.21053, MorrisCONA3.368421CN284.21053, MorrisCONA3.368421CN252.63158, MorrisCONA4.789474CN293.68421, MorrisCONA9.526316CN293.68421, MorrisCONA9.526316CN262.10526, MorrisCONA1CN268.42105, MorrisCONA1CN2100, MorrisCONA5.736842CN2100, MorrisCONA2.894737CN265.26316, MorrisCONA2.894737CN296.8421, MorrisCONA7.631579CN296.8421, MorrisCONA2.894737CN252.63158, MorrisCONA2.894737CN284.21053, MorrisCONA7.631579CN284.21053, MorrisCONA3.368421CN265.26316, MorrisCONA8.105263CN265.26316, MorrisCONA8.105263CN296.8421, MorrisCONA6.68421CN281.05264, MorrisCONA1.947368CN281.05264, MorrisCONA1.947368CN249.47368, MorrisCONA8.578947CN293.68421, MorrisCONA8.578947CN262.10526, MorrisCONA3.842105CN262.10526, MorrisCONA1.947368CN281.05264, MorrisCONA6.68421CN281.05264, MorrisCONA6.68421CN249.47368, MorrisCONA3.842105CN240, MorrisCONA3.842105CN271.57895, MorrisCONA8.578947CN271.57895, MorrisCONA1CN284.21053, MorrisCONA5.736842CN284.21053, MorrisCONA5.736842CN252.63158, MorrisCONA5.736842CN252.63158, MorrisCONA5.736842CN284.21053, MorrisCONA1CN284.21053, MorrisCONA8.578947CN274.73684, MorrisCONA8.578947CN243.15789, MorrisCONA3.842105CN243.15789, MorrisCONA6.68421CN268.42105, MorrisCONA1.947368CN268.42105, MorrisCONA1.947368CN2100, MorrisCONA2.421053CN268.42105, MorrisCONA7.157895CN268.42105, MorrisCONA7.157895CN2100, MorrisCONA7.631579CN249.47368, MorrisCONA2.894737CN249.47368, MorrisCONA2.894737CN281.05264, MorrisCONA8.578947CN274.73684, MorrisCONA3.842105CN274.73684, MorrisCONA3.842105CN243.15789, MorrisCONA9.526316CN290.52631, MorrisCONA9.526316CN258.94737, MorrisCONA4.789474CN258.94737, MorrisCONA8.105263CN268.42105, MorrisCONA3.368421CN268.42105, MorrisCONA3.368421CN2100, MorrisCONA5.263158CN252.63158, MorrisCONA5.263158CN284.21053, MorrisCONA10CN284.21053, MorrisCONA9.526316CN240, MorrisCONA4.789474CN240, MorrisCONA4.789474CN271.57895, MorrisCONA3.368421CN290.52631, MorrisCONA8.105263CN290.52631, MorrisCONA8.105263CN258.94737, MorrisCONA9.526316CN290.52631, MorrisCONA4.789474CN290.52631, MorrisCONA4.789474CN258.94737, MorrisCONA8.105263CN2100, MorrisCONA8.105263CN268.42105, MorrisCONA3.368421CN268.42105, MorrisCONA3.368421CN240, MorrisCONA3.368421CN271.57895, MorrisCONA8.105263CN271.57895, MorrisCONA2.894737CN284.21053, MorrisCONA7.631579CN284.21053, MorrisCONA7.631579CN252.63158, MorrisCONA3.842105CN293.68421, MorrisCONA8.578947CN293.68421, MorrisCONA8.578947CN262.10526, MorrisCONA7.631579CN284.21053, MorrisCONA7.631579CN252.63158, MorrisCONA2.894737CN252.63158, MorrisCONA6.210526CN287.36842, MorrisCONA6.210526CN255.78947, MorrisCONA1.473684CN255.78947, MorrisCONA8.105263CN281.05264, MorrisCONA8.105263CN249.47368, MorrisCONA3.368421CN249.47368, MorrisCONA7.631579CN296.8421, MorrisCONA2.894737CN296.8421, MorrisCONA2.894737CN265.26316, MorrisCONA2.421053CN265.26316, MorrisCONA2.421053CN296.8421, MorrisCONA7.157895CN296.8421, MorrisCONA2.421053CN240, MorrisCONA7.157895CN240, MorrisCONA7.157895CN271.57895, MorrisCONA3.368421CN277.89474, MorrisCONA3.368421CN246.31579, MorrisCONA8.105263CN246.31579, MorrisCONA3.842105CN265.26316, MorrisCONA8.578947CN265.26316, MorrisCONA8.578947CN296.8421, MorrisCONA4.789474CN287.36842, MorrisCONA9.526316CN287.36842, MorrisCONA9.526316CN255.78947, MorrisCONA9.526316CN249.47368, MorrisCONA4.789474CN249.47368, MorrisCONA4.789474CN281.05264, MorrisCONA2.421053CN265.26316, MorrisCONA7.157895CN265.26316, MorrisCONA7.157895CN296.8421, MorrisCONA4.31579CN284.21053, MorrisCONA9.052631CN284.21053, MorrisCONA9.052631CN252.63158, MorrisCONA7.157895CN249.47368, MorrisCONA7.157895CN281.05264, MorrisCONA2.421053CN281.05264, MorrisCONA1.473684CN246.31579, MorrisCONA1.473684CN277.89474, MorrisCONA6.210526CN277.89474, MorrisCONA3.842105CN268.42105, MorrisCONA3.842105CN2100, MorrisCONA8.578947CN2100, MorrisCONA1.947368CN246.31579, MorrisCONA1.947368CN277.89474, MorrisCONA6.68421CN277.89474, MorrisCONA10CN262.10526, MorrisCONA10CN293.68421, MorrisCONA5.263158CN293.68421, MorrisCONA1.947368CN265.26316, MorrisCONA1.947368CN296.8421, MorrisCONA6.68421CN296.8421, MorrisCONA1CN271.57895, MorrisCONA5.736842CN271.57895, MorrisCONA5.736842CN240, MorrisCONA1CN290.52631, MorrisCONA5.736842CN290.52631, MorrisCONA5.736842CN258.94737, MorrisCONA4.789474CN265.26316, MorrisCONA9.526316CN265.26316, MorrisCONA9.526316CN296.8421, MorrisCONA7.631579CN296.8421, MorrisCONA7.631579CN265.26316, MorrisCONA2.894737CN265.26316, MorrisCONA1.473684CN246.31579, MorrisCONA6.210526CN246.31579, MorrisCONA6.210526CN277.89474, MorrisCONA4.789474CN290.52631, MorrisCONA4.789474CN258.94737, MorrisCONA9.526316CN258.94737, MorrisCONA8.105263CN255.78947, MorrisCONA3.368421CN255.78947, MorrisCONA3.368421CN287.36842, MorrisCONA6.210526CN246.31579, MorrisCONA1.473684CN246.31579, MorrisCONA1.473684CN277.89474, MorrisCONA1.947368CN2100, MorrisCONA1.947368CN268.42105, MorrisCONA6.68421CN268.42105, MorrisCONA8.105263CN274.73684, MorrisCONA8.105263CN243.15789, MorrisCONA3.368421CN243.15789, MorrisCONA1.473684CN265.26316, MorrisCONA6.210526CN265.26316, MorrisCONA6.210526CN296.8421, MorrisCONA7.157895CN287.36842, MorrisCONA2.421053CN287.36842, MorrisCONA2.421053CN255.78947, MorrisCONA3.368421CN258.94737, MorrisCONA3.368421CN290.52631, MorrisCONA8.105263CN290.52631, MorrisCONA2.421053CN240, MorrisCONA2.421053CN271.57895, MorrisCONA7.157895CN271.57895, MorrisCONA4.31579CN249.47368, MorrisCONA9.052631CN249.47368, MorrisCONA9.052631CN281.05264, MorrisCONA3.842105CN281.05264, MorrisCONA3.842105CN249.47368, MorrisCONA8.578947CN249.47368, MorrisCONA3.368421CN284.21053, MorrisCONA3.368421CN252.63158, MorrisCONA8.105263CN252.63158, MorrisCONA1.947368CN287.36842, MorrisCONA6.68421CN287.36842, MorrisCONA6.68421CN255.78947, MorrisCONA3.368421CN293.68421, MorrisCONA3.368421CN262.10526, MorrisCONA8.105263CN262.10526, MorrisCONA3.368421CN277.89474, MorrisCONA8.105263CN277.89474, MorrisCONA8.105263CN246.31579, MorrisCONA6.210526CN255.78947, MorrisCONA1.473684CN255.78947, MorrisCONA1.473684CN287.36842, MorrisCONA2.421053CN274.73684, MorrisCONA7.157895CN274.73684, MorrisCONA7.157895CN243.15789, MorrisCONA9.526316CN271.57895, MorrisCONA4.789474CN271.57895, MorrisCONA4.789474CN240, MorrisCONA4.789474CN246.31579, MorrisCONA4.789474CN277.89474, MorrisCONA9.526316CN277.89474, MorrisCONA5.736842CN258.94737, MorrisCONA5.736842CN290.52631, MorrisCONA1CN290.52631, MorrisCONA7.631579CN274.73684, MorrisCONA2.894737CN274.73684, MorrisCONA2.894737CN243.15789, MorrisCONA2.894737CN265.26316, MorrisCONA7.631579CN265.26316, MorrisCONA7.631579CN296.8421, MorrisCONA7.157895CN284.21053, MorrisCONA2.421053CN284.21053, MorrisCONA2.421053CN252.63158, MorrisCONA8.578947CN243.15789, MorrisCONA8.578947CN274.73684, MorrisCONA3.842105CN274.73684, MorrisCONA6.68421CN287.36842, MorrisCONA6.68421CN255.78947, MorrisCONA1.947368CN255.78947, MorrisCONA10CN293.68421, MorrisCONA5.263158CN293.68421, MorrisCONA5.263158CN262.10526, MorrisCONA3.368421CN252.63158, MorrisCONA3.368421CN284.21053, MorrisCONA8.105263CN284.21053, MorrisCONA4.31579CN281.05264, MorrisCONA9.052631CN281.05264, MorrisCONA9.052631CN249.47368, MorrisCONA7.157895CN262.10526, MorrisCONA2.421053CN262.10526, MorrisCONA2.421053CN293.68421, MorrisCONA9.052631CN2100, MorrisCONA4.31579CN2100, MorrisCONA4.31579CN268.42105, MorrisCONA2.421053CN293.68421, MorrisCONA7.157895CN293.68421, MorrisCONA7.157895CN262.10526, MorrisCONA9.526316CN265.26316, MorrisCONA4.789474CN265.26316, MorrisCONA4.789474CN296.8421, MorrisCONA1CN255.78947, MorrisCONA1CN287.36842, MorrisCONA5.736842CN287.36842, MorrisCONA1.473684CN240, MorrisCONA6.210526CN240, MorrisCONA6.210526CN271.57895, MorrisCONA7.157895CN2100, MorrisCONA2.421053CN2100, MorrisCONA2.421053CN268.42105, MorrisCONA8.578947CN296.8421, MorrisCONA3.842105CN296.8421, MorrisCONA3.842105CN265.26316, MorrisCONA7.631579CN271.57895, MorrisCONA7.631579CN240, MorrisCONA2.894737CN240, MorrisCONA9.052631CN268.42105, MorrisCONA4.31579CN268.42105, MorrisCONA4.31579CN2100, MorrisCONA1.473684CN249.47368, MorrisCONA6.210526CN249.47368, MorrisCONA6.210526CN281.05264, MorrisCONA5.263158CN284.21053, MorrisCONA5.263158CN252.63158, MorrisCONA10CN252.63158, MorrisCONA9.052631CN290.52631, MorrisCONA4.31579CN290.52631, MorrisCONA4.31579CN258.94737, MorrisCONA5.263158CN243.15789, MorrisCONA10CN243.15789, MorrisCONA10CN274.73684, MorrisCONA6.68421CN246.31579, MorrisCONA6.68421CN277.89474, MorrisCONA1.947368CN277.89474, MorrisCONA2.421053CN271.57895, MorrisCONA2.421053CN240, MorrisCONA7.157895CN240, MorrisCONA7.157895CN296.8421, MorrisCONA7.157895CN265.26316, MorrisCONA2.421053CN265.26316, MorrisCONA9.052631CN293.68421, MorrisCONA9.052631CN262.10526, MorrisCONA4.31579CN262.10526, MorrisCONA5.263158CN287.36842, MorrisCONA10CN287.36842, MorrisCONA10CN255.78947, MorrisCONA10CN290.52631, MorrisCONA10CN258.94737, MorrisCONA5.263158CN258.94737, MorrisCONA7.631579CN246.31579, MorrisCONA2.894737CN246.31579, MorrisCONA2.894737CN277.89474, MorrisCONA6.210526CN255.78947, MorrisCONA6.210526CN287.36842, MorrisCONA1.473684CN287.36842, MorrisCONA1CN293.68421, MorrisCONA5.736842CN293.68421, MorrisCONA5.736842CN262.10526, MorrisCONA1.473684CN277.89474, MorrisCONA1.473684CN246.31579, MorrisCONA6.210526CN246.31579, MorrisCONA2.421053CN243.15789, MorrisCONA7.157895CN243.15789, MorrisCONA7.157895CN274.73684, MorrisCONA7.631579CN277.89474, MorrisCONA2.894737CN277.89474, MorrisCONA2.894737CN246.31579, MorrisCONA3.842105CN265.26316, MorrisCONA3.842105CN296.8421, MorrisCONA8.578947CN296.8421, MorrisCONA9.526316CN258.94737, MorrisCONA4.789474CN258.94737, MorrisCONA4.789474CN290.52631, MorrisCONA1.473684CN271.57895, MorrisCONA6.210526CN271.57895, MorrisCONA6.210526CN240, MorrisCONA6.210526CN243.15789, MorrisCONA1.473684CN243.15789, MorrisCONA1.473684CN274.73684, MorrisCONA3.842105CN2100, MorrisCONA3.842105CN268.42105, MorrisCONA8.578947CN268.42105, MorrisCONA8.578947CN284.21053, MorrisCONA8.578947CN252.63158, MorrisCONA3.842105CN252.63158, MorrisCONA1.947368CN243.15789, MorrisCONA1.947368CN274.73684, MorrisCONA6.68421CN274.73684, MorrisCONA4.31579CN246.31579, MorrisCONA4.31579CN277.89474, MorrisCONA9.052631CN277.89474, MorrisCONA2.421053CN287.36842, MorrisCONA2.421053CN255.78947, MorrisCONA7.157895CN255.78947, MorrisCONA9.526316CN268.42105, MorrisCONA9.526316CN2100, MorrisCONA4.789474CN2100, MorrisCONA6.68421CN296.8421, MorrisCONA6.68421CN265.26316, MorrisCONA1.947368CN265.26316, MorrisCONA2.894737CN277.89474, MorrisCONA7.631579CN277.89474, MorrisCONA7.631579CN246.31579, MorrisCONA6.210526CN287.36842, MorrisCONA1.473684CN287.36842, MorrisCONA1.473684CN255.78947, MorrisCONA10CN246.31579, MorrisCONA10CN277.89474, MorrisCONA5.263158CN277.89474, MorrisCONA2.421053CN281.05264, MorrisCONA7.157895CN281.05264, MorrisCONA7.157895CN249.47368, MorrisCONA6.68421CN2100, MorrisCONA1.947368CN2100, MorrisCONA1.947368CN268.42105]
    Simulation Base
      Clock: StartDate=1900-01-01; EndDate=1900-12-31
      Summary SummaryFile
      Weather: FileName=%root%\Examples\WeatherFiles\Dalby.met
      SoilArbitrator
      Zone Field: Area=1; Slope=0
        Report: EventNames=[Wheat].Harvesting
          VariableNames:
            [Clock].Today
            [Wheat].Phenology.Zadok.Stage
            [Wheat].Phenology.CurrentStageName
            [Wheat].AboveGround.Wt
            [Wheat].AboveGround.N
            [Wheat].Grain.Total.Wt*10 as Yield
            [Wheat].Grain.Protein
            [Wheat].Grain.Size
            [Wheat].Grain.Number
            [Wheat].Grain.Total.Wt
            [Wheat].Grain.Total.N
            [Wheat].Total.Wt
        Fertiliser
        Soil: ASCOrder=Vertosol; ASCSubOrder=Black; SoilType=Clay; Site=Norwin; NearestTown=Norwin; Region=Darling Downs and Granite Belt; State=Queensland; Country=Australia; NaturalVegetation=Qld. Bluegrass, possible Qld. Blue gum; ApsoilNumber=900; Latitude=-27.581836; Longitude=151.320206; LocationAccuracy=+/- 20m
          DataSource=CSIRO Sustainable Ecosystems, Toowoomba; Characteriesd as part of the GRDC funded project"Doing it better, doing it smarter, managing soil water in Australian agriculture' 2011
          Comments=OC, CLL for all crops estimated-based on Bongeen Mywybilla Soil No1
          Water
            Thickness  BD       AirDry    LL15      DUL       SAT       KS
            150        1.01056  0.13025   0.2605    0.521     0.588655  20
            150        1.07146  0.198689  0.248362  0.496723  0.565677  20
            300        1.09394  0.28      0.28      0.488438  0.557193  20
            300        1.15861  0.28      0.28      0.480297  0.532787  20
            300        1.17301  0.28      0.28      0.471584  0.527354  20
            300        1.16287  0.28      0.28      0.457071  0.53118   20
            300        1.1875   0.28      0.28      0.452332  0.521888  20
            SoilCrop WheatSoil: LL=[0.261, 0.248, 0.28, 0.306, 0.36, 0.392, 0.446]; KL=[0.06, 0.06, 0.06, 0.04, 0.04, 0.02, 0.01]; XF=[1, 1, 1, 1, 1, 1, 1]
          SoilWater: SummerDate=1-Nov; SummerU=5; SummerCona=5; WinterDate=1-Apr; WinterU=5; WinterCona=5; DiffusConst=40; DiffusSlope=16; Salb=0.12; CN2Bare=73; CNRed=20; CNCov=0.8; max_pond=0; Thickness=[150, 150, 300, 300, 300, 300, 300]; SWCON=[0.3, 0.3, 0.3, 0.3, 0.3, 0.3, 0.3]; residueinterception=0
          SoilNitrogen: fom_type=[default, manure, mucuna, lablab, shemp, stable]; fract_carb=[0.2, 0.3, 0.54, 0.57, 0.45, 0]; fract_cell=[0.7, 0.3, 0.37, 0.37, 0.47, 0.1]; fract_lign=[0.1, 0.4, 0.09, 0.06, 0.08, 0.9]
          SoilOrganicMatter: RootCN=40; RootWt=1000; SoilCN=12; EnrACoeff=7.4; EnrBCoeff=0.2; OCUnits=Total
            Thickness  OC    FBiom  FInert
            150        1.2   0.04   0.4
            150        0.96  0.02   0.6
            300        0.6   0.02   0.8
            300        0.3   0.02   1
            300        0.18  0.01   1
            300        0.12  0.01   1
            300        0.12  0.01   1
          Analysis: Thickness=[150, 150, 300, 300, 300, 300, 300]; PH=[8, 8, 8, 8, 8, 8, 8]; PHUnits=Water; BoronUnits=HotWater
          InitialWater: PercentMethod=EvenlyDistributed; FractionFull=1
          Sample InitialN: NO3Units=ppm; NH4Units=ppm; SWUnits=Volumetric; OCUnits=Total; PHUnits=Water
            Thickness  NO3  NH4
            150        1    0.1
            150        1    0.1
            300        1    0.1
            300        1    0.1
            300        1    0.1
            300        1    0.1
            300        1    0.1
          CERESSoilTemperature
        SurfaceOrganicMatter: PoolName=wheat_stubble; type=wheat; mass=500; standing_fraction=0; cnr=100; CriticalResidueWeight=2000; OptimumDecompTemp=20; MaxCumulativeEOS=20; CNRatioDecompCoeff=0.277; CNRatioDecompThreshold=25; TotalLeachRain=25; MinRainToLeach=10; CriticalMinimumOrganicC=0.004; DefaultCPRatio=0; DefaultStandingFraction=0; StandingExtinctCoeff=0.5; FractionFaecesAdded=0.5
          Pools:
            {PoolName=wheat_stubble, ResidueType=wheat, Mass=500, CNRatio=100, StandingFraction=0}
          ResidueTypes: LoadFromResource=ResidueTypes
        Plant Wheat: CropType=Wheat
        MicroClimate: a_interception=0; b_interception=1; c_interception=0; d_interception=0; soil_albedo=0.3; sun_angle=15; soil_heat_flux_fraction=0.4; night_interception_fraction=0.5; refheight=2; albedo=0.15; emissivity=0.96; RadIntTotal=0
        Manager SowingFertiliser
          Amount = 160
          CropName = wheat
```csharp
using System;
using Models.Core;
using Models.PMF;
namespace Models
{
    [Serializable]
    public class Script : Model
    {
        [Link] Clock Clock;
        [Link] Fertiliser Fertiliser;
        [Link] Summary Summary;
        
        
        [Description("Amount of fertiliser to be applied (kg/ha)")]
        public double Amount { get; set;}
        
        [Description("Crop to be fertilised")]
        public string CropName { get; set;}
        
        
        

        [EventSubscribe("Sowing")]
        private void OnSowing(object sender, EventArgs e)
        {
            Model crop = sender as Model;
            if (crop.Name.ToLower()==CropName.ToLower())
                Fertiliser.Apply(Amount: Amount, Type: Fertiliser.Types.NO3N);
        }
        
    }
}
```
        Manager Harvest
```csharp
using System;
using Models.Core;
using Models.PMF;
using Models.Soils;
using Models.Utilities;
using APSIM.Shared.Utilities;

namespace Models
{
    [Serializable]
    public class Script : Model
    {
        [Link] Plant Wheat;

        [EventSubscribe("DoManagement")]
        private void OnDoManagement(object sender, EventArgs e)
        {
            if (Wheat.IsReadyForHarvesting)
            {
               Wheat.Harvest();
               Wheat.EndCrop();    
            }
        
        }
        
    }
}
```
        SoluteManager
        Manager SowingRule1
          StartDate = 1-may
          EndDate = 10-jul
          MinESW = 100
          MinRain = 25
          RainDays = 7
          CultivarName = Hartog
          SowingDepth = 30
          RowSpacing = 250
          Population = 120
```csharp
using System;
using Models.Core;
using Models.PMF;
using Models.Soils;
using Models.Utilities;
using APSIM.Shared.Utilities;

namespace Models
{
    [Serializable]
    public class Script : Model
    {
        [Link] Clock Clock;
        [Link] Fertiliser Fertiliser;
        [Link] Summary Summary;
        [Link] Plant Wheat;
        [Link] Soil Soil; 
        Accumulator accumulatedRain;
        
        [Description("Start of sowing window (d-mmm)")]
        public string StartDate { get; set;}
        [Description("End of sowing window (d-mmm)")]
        public string EndDate { get; set;}
        [Description("Minimum extractable soil water for sowing (mm)")]
        public double MinESW { get; set;}
        [Description("Accumulated rainfall required for sowing (mm)")]
        public double MinRain { get; set;}
        [Description("Duration of rainfall accumulation (d)")]
        public int RainDays { get; set;}
        [Description("Cultivar to be sown")]
        [Display(Type=DisplayType.CultivarName)]
        public string CultivarName { get; set;}
        [Description("Sowing depth (mm)")]
        public double SowingDepth { get; set;}        
        [Description("Row spacing (mm)")]
        public double RowSpacing { get; set;}    
        [Description("Plant population (/m2)")]
        public double Population { get; set;}    
        
        
        [EventSubscribe("Commencing")]
        private void OnSimulationCommencing(object sender, EventArgs e)
        {
            accumulatedRain = new Accumulator(this, "[Weather].Rain", RainDays);
        }
        

        [EventSubscribe("DoManagement")]
        private void OnDoManagement(object sender, EventArgs e)
        {
            accumulatedRain.Update();
            
            if (DateUtilities.WithinDates(StartDate,Clock.Today,EndDate) &&
                !Wheat.IsAlive &&
                MathUtilities.Sum(Soil.SoilWater.ESW) > MinESW &&
                accumulatedRain.Sum > MinRain)
            {
               Wheat.Sow(population:Population, cultivar:CultivarName, depth:SowingDepth, rowSpacing:RowSpacing);    
            }
        
        }
        
    }
}
```
  DataStore
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