Simulations: Version=46
  DataStore
  Morris FallowSensitivity: NumPaths=25; NumIntervals=20; Jump=10
    ParameterValues={diffgram=[[{{urn:schemas-microsoft-com:xml-diffgram-v1}id=d60428e5-9dbc-49c0-88e3-25f3a898746d1, {urn:schemas-microsoft-com:xml-msdata}rowOrder=0, {urn:schemas-microsoft-com:xml-diffgram-v1}hasChanges=inserted, ResidueWt=750, CN2=80.5, Cona=6.6, U=2.2, OC=0.575, ResidueCNR=104, SWCon=0.48, DiffusConst=54, DiffusSlope=18.5}, {{urn:schemas-microsoft-com:xml-diffgram-v1}id=d60428e5-9dbc-49c0-88e3-25f3a898746d2, {urn:schemas-microsoft-com:xml-msdata}rowOrder=1, {urn:schemas-microsoft-com:xml-diffgram-v1}hasChanges=inserted, ResidueWt=750, CN2=80.5, Cona=6.6, U=2.2, OC=1.325, ResidueCNR=104, SWCon=0.48, DiffusConst=54, DiffusSlope=18.5}, {{urn:schemas-microsoft-com:xml-diffgram-v1}id=d60428e5-9dbc-49c0-88e3-25f3a898746d3, {urn:schemas-microsoft-com:xml-msdata}rowOrder=2, {urn:schemas-microsoft-com:xml-diffgram-v1}hasChanges=inserted, ResidueWt=750, CN2=80.5, Cona=6.6, U=2.2, OC=1.325, ResidueCNR=104, SWCon=0.48, DiffusConst=54, DiffusSlope=13.5}, {{urn:schemas-microsoft-com:xml-diffgram-v1}id=d60428e5-9dbc-49c0-88e3-25f3a898746d4, {urn:schemas-microsoft-com:xml-msdata}rowOrder=3, {urn:schemas-microsoft-com:xml-diffgram-v1}hasChanges=inserted, ResidueWt=750, CN2=80.5, Cona=6.6, U=2.2, OC=1.325, ResidueCNR=104, SWCon=0.28, DiffusConst=54, DiffusSlope=13.5}, {{urn:schemas-microsoft-com:xml-diffgram-v1}id=d60428e5-9dbc-49c0-88e3-25f3a898746d5, {urn:schemas-microsoft-com:xml-msdata}rowOrder=4, {urn:schemas-microsoft-com:xml-diffgram-v1}hasChanges=inserted, ResidueWt=750, CN2=80.5, Cona=6.6, U=2.2, OC=1.325, ResidueCNR=64, SWCon=0.28, DiffusConst=54, DiffusSlope=13.5}, {{urn:schemas-microsoft-com:xml-diffgram-v1}id=d60428e5-9dbc-49c0-88e3-25f3a898746d6, {urn:schemas-microsoft-com:xml-msdata}rowOrder=5, {urn:schemas-microsoft-com:xml-diffgram-v1}hasChanges=inserted, ResidueWt=750, CN2=80.5, Cona=3.6, U=2.2, OC=1.325, ResidueCNR=64, SWCon=0.28, DiffusConst=54, DiffusSlope=13.5}, {{urn:schemas-microsoft-com:xml-diffgram-v1}id=d60428e5-9dbc-49c0-88e3-25f3a898746d7, {urn:schemas-microsoft-com:xml-msdata}rowOrder=6, {urn:schemas-microsoft-com:xml-diffgram-v1}hasChanges=inserted, ResidueWt=3250, CN2=80.5, Cona=3.6, U=2.2, OC=1.325, ResidueCNR=64, SWCon=0.28, DiffusConst=54, DiffusSlope=13.5}, {{urn:schemas-microsoft-com:xml-diffgram-v1}id=d60428e5-9dbc-49c0-88e3-25f3a898746d8, {urn:schemas-microsoft-com:xml-msdata}rowOrder=7, {urn:schemas-microsoft-com:xml-diffgram-v1}hasChanges=inserted, ResidueWt=3250, CN2=73, Cona=3.6, U=2.2, OC=1.325, ResidueCNR=64, SWCon=0.28, DiffusConst=54, DiffusSlope=13.5}, {{urn:schemas-microsoft-com:xml-diffgram-v1}id=d60428e5-9dbc-49c0-88e3-25f3a898746d9, {urn:schemas-microsoft-com:xml-msdata}rowOrder=8, {urn:schemas-microsoft-com:xml-diffgram-v1}hasChanges=inserted, ResidueWt=3250, CN2=73, Cona=3.6, U=2.2, OC=1.325, ResidueCNR=64, SWCon=0.28, DiffusConst=34, DiffusSlope=13.5}, {{urn:schemas-microsoft-com:xml-diffgram-v1}id=d60428e5-9dbc-49c0-88e3-25f3a898746d10, {urn:schemas-microsoft-com:xml-msdata}rowOrder=9, {urn:schemas-microsoft-com:xml-diffgram-v1}hasChanges=inserted, ResidueWt=3250, CN2=73, Cona=3.6, U=6.2, OC=1.325, ResidueCNR=64, SWCon=0.28, DiffusConst=34, DiffusSlope=13.5}, {{urn:schemas-microsoft-com:xml-diffgram-v1}id=d60428e5-9dbc-49c0-88e3-25f3a898746d11, {urn:schemas-microsoft-com:xml-msdata}rowOrder=10, {urn:schemas-microsoft-com:xml-diffgram-v1}hasChanges=inserted, ResidueWt=4500, CN2=82.75, Cona=5.7, U=8.6, OC=1.7, ResidueCNR=120, SWCon=0.5, DiffusConst=44, DiffusSlope=14.5}, {{urn:schemas-microsoft-com:xml-diffgram-v1}id=d60428e5-9dbc-49c0-88e3-25f3a898746d12, {urn:schemas-microsoft-com:xml-msdata}rowOrder=11, {urn:schemas-microsoft-com:xml-diffgram-v1}hasChanges=inserted, ResidueWt=2000, CN2=82.75, Cona=5.7, U=8.6, OC=1.7, ResidueCNR=120, SWCon=0.5, DiffusConst=44, DiffusSlope=14.5}, {{urn:schemas-microsoft-com:xml-diffgram-v1}id=d60428e5-9dbc-49c0-88e3-25f3a898746d13, {urn:schemas-microsoft-com:xml-msdata}rowOrder=12, {urn:schemas-microsoft-com:xml-diffgram-v1}hasChanges=inserted, ResidueWt=2000, CN2=75.25, Cona=5.7, U=8.6, OC=1.7, ResidueCNR=120, SWCon=0.5, DiffusConst=44, DiffusSlope=14.5}, {{urn:schemas-microsoft-com:xml-diffgram-v1}id=d60428e5-9dbc-49c0-88e3-25f3a898746d14, {urn:schemas-microsoft-com:xml-msdata}rowOrder=13, {urn:schemas-microsoft-com:xml-diffgram-v1}hasChanges=inserted, ResidueWt=2000, CN2=75.25, Cona=5.7, U=8.6, OC=1.7, ResidueCNR=80, SWCon=0.5, DiffusConst=44, DiffusSlope=14.5}, {{urn:schemas-microsoft-com:xml-diffgram-v1}id=d60428e5-9dbc-49c0-88e3-25f3a898746d15, {urn:schemas-microsoft-com:xml-msdata}rowOrder=14, {urn:schemas-microsoft-com:xml-diffgram-v1}hasChanges=inserted, ResidueWt=2000, CN2=75.25, Cona=5.7, U=8.6, OC=0.95, ResidueCNR=80, SWCon=0.5, DiffusConst=44, DiffusSlope=14.5}, {{urn:schemas-microsoft-com:xml-diffgram-v1}id=d60428e5-9dbc-49c0-88e3-25f3a898746d16, {urn:schemas-microsoft-com:xml-msdata}rowOrder=15, {urn:schemas-microsoft-com:xml-diffgram-v1}hasChanges=inserted, ResidueWt=2000, CN2=75.25, Cona=5.7, U=8.6, OC=0.95, ResidueCNR=80, SWCon=0.3, DiffusConst=44, DiffusSlope=14.5}, {{urn:schemas-microsoft-com:xml-diffgram-v1}id=d60428e5-9dbc-49c0-88e3-25f3a898746d17, {urn:schemas-microsoft-com:xml-msdata}rowOrder=16, {urn:schemas-microsoft-com:xml-diffgram-v1}hasChanges=inserted, ResidueWt=2000, CN2=75.25, Cona=8.7, U=8.6, OC=0.95, ResidueCNR=80, SWCon=0.3, DiffusConst=44, DiffusSlope=14.5}, {{urn:schemas-microsoft-com:xml-diffgram-v1}id=d60428e5-9dbc-49c0-88e3-25f3a898746d18, {urn:schemas-microsoft-com:xml-msdata}rowOrder=17, {urn:schemas-microsoft-com:xml-diffgram-v1}hasChanges=inserted, ResidueWt=2000, CN2=75.25, Cona=8.7, U=4.6, OC=0.95, ResidueCNR=80, SWCon=0.3, DiffusConst=44, DiffusSlope=14.5}, {{urn:schemas-microsoft-com:xml-diffgram-v1}id=d60428e5-9dbc-49c0-88e3-25f3a898746d19, {urn:schemas-microsoft-com:xml-msdata}rowOrder=18, {urn:schemas-microsoft-com:xml-diffgram-v1}hasChanges=inserted, ResidueWt=2000, CN2=75.25, Cona=8.7, U=4.6, OC=0.95, ResidueCNR=80, SWCon=0.3, DiffusConst=24, DiffusSlope=14.5}, {{urn:schemas-microsoft-com:xml-diffgram-v1}id=d60428e5-9dbc-49c0-88e3-25f3a898746d20, {urn:schemas-microsoft-com:xml-msdata}rowOrder=19, {urn:schemas-microsoft-com:xml-diffgram-v1}hasChanges=inserted, ResidueWt=2000, CN2=75.25, Cona=8.7, U=4.6, OC=0.95, ResidueCNR=80, SWCon=0.3, DiffusConst=24, DiffusSlope=19.5}, {{urn:schemas-microsoft-com:xml-diffgram-v1}id=d60428e5-9dbc-49c0-88e3-25f3a898746d21, {urn:schemas-microsoft-com:xml-msdata}rowOrder=20, {urn:schemas-microsoft-com:xml-diffgram-v1}hasChanges=inserted, ResidueWt=2500, CN2=75.25, Cona=4.5, U=4.2, OC=0.575, ResidueCNR=96, SWCon=0.18, DiffusConst=32, DiffusSlope=13.5}, {{urn:schemas-microsoft-com:xml-diffgram-v1}id=d60428e5-9dbc-49c0-88e3-25f3a898746d22, {urn:schemas-microsoft-com:xml-msdata}rowOrder=21, {urn:schemas-microsoft-com:xml-diffgram-v1}hasChanges=inserted, ResidueWt=2500, CN2=75.25, Cona=7.5, U=4.2, OC=0.575, ResidueCNR=96, SWCon=0.18, DiffusConst=32, DiffusSlope=13.5}, {{urn:schemas-microsoft-com:xml-diffgram-v1}id=d60428e5-9dbc-49c0-88e3-25f3a898746d23, {urn:schemas-microsoft-com:xml-msdata}rowOrder=22, {urn:schemas-microsoft-com:xml-diffgram-v1}hasChanges=inserted, ResidueWt=2500, CN2=75.25, Cona=7.5, U=4.2, OC=0.575, ResidueCNR=56, SWCon=0.18, DiffusConst=32, DiffusSlope=13.5}, {{urn:schemas-microsoft-com:xml-diffgram-v1}id=d60428e5-9dbc-49c0-88e3-25f3a898746d24, {urn:schemas-microsoft-com:xml-msdata}rowOrder=23, {urn:schemas-microsoft-com:xml-diffgram-v1}hasChanges=inserted, ResidueWt=2500, CN2=75.25, Cona=7.5, U=4.2, OC=0.575, ResidueCNR=56, SWCon=0.38, DiffusConst=32, DiffusSlope=13.5}, {{urn:schemas-microsoft-com:xml-diffgram-v1}id=d60428e5-9dbc-49c0-88e3-25f3a898746d25, {urn:schemas-microsoft-com:xml-msdata}rowOrder=24, {urn:schemas-microsoft-com:xml-diffgram-v1}hasChanges=inserted, ResidueWt=5000, CN2=75.25, Cona=7.5, U=4.2, OC=0.575, ResidueCNR=56, SWCon=0.38, DiffusConst=32, DiffusSlope=13.5}, {{urn:schemas-microsoft-com:xml-diffgram-v1}id=d60428e5-9dbc-49c0-88e3-25f3a898746d26, {urn:schemas-microsoft-com:xml-msdata}rowOrder=25, {urn:schemas-microsoft-com:xml-diffgram-v1}hasChanges=inserted, ResidueWt=5000, CN2=75.25, Cona=7.5, U=4.2, OC=0.575, ResidueCNR=56, SWCon=0.38, DiffusConst=52, DiffusSlope=13.5}, {{urn:schemas-microsoft-com:xml-diffgram-v1}id=d60428e5-9dbc-49c0-88e3-25f3a898746d27, {urn:schemas-microsoft-com:xml-msdata}rowOrder=26, {urn:schemas-microsoft-com:xml-diffgram-v1}hasChanges=inserted, ResidueWt=5000, CN2=75.25, Cona=7.5, U=8.2, OC=0.575, ResidueCNR=56, SWCon=0.38, DiffusConst=52, DiffusSlope=13.5}, {{urn:schemas-microsoft-com:xml-diffgram-v1}id=d60428e5-9dbc-49c0-88e3-25f3a898746d28, {urn:schemas-microsoft-com:xml-msdata}rowOrder=27, {urn:schemas-microsoft-com:xml-diffgram-v1}hasChanges=inserted, ResidueWt=5000, CN2=75.25, Cona=7.5, U=8.2, OC=1.325, ResidueCNR=56, SWCon=0.38, DiffusConst=52, DiffusSlope=13.5}, {{urn:schemas-microsoft-com:xml-diffgram-v1}id=d60428e5-9dbc-49c0-88e3-25f3a898746d29, {urn:schemas-microsoft-com:xml-msdata}rowOrder=28, {urn:schemas-microsoft-com:xml-diffgram-v1}hasChanges=inserted, ResidueWt=5000, CN2=82.75, Cona=7.5, U=8.2, OC=1.325, ResidueCNR=56, SWCon=0.38, DiffusConst=52, DiffusSlope=13.5}, {{urn:schemas-microsoft-com:xml-diffgram-v1}id=d60428e5-9dbc-49c0-88e3-25f3a898746d30, {urn:schemas-microsoft-com:xml-msdata}rowOrder=29, {urn:schemas-microsoft-com:xml-diffgram-v1}hasChanges=inserted, ResidueWt=5000, CN2=82.75, Cona=7.5, U=8.2, OC=1.325, ResidueCNR=56, SWCon=0.38, DiffusConst=52, DiffusSlope=18.5}, {{urn:schemas-microsoft-com:xml-diffgram-v1}id=d60428e5-9dbc-49c0-88e3-25f3a898746d31, {urn:schemas-microsoft-com:xml-msdata}rowOrder=30, {urn:schemas-microsoft-com:xml-diffgram-v1}hasChanges=inserted, ResidueWt=3500, CN2=79.75, Cona=6.6, U=4.2, OC=2, ResidueCNR=96, SWCon=0.36, DiffusConst=58, DiffusSlope=14}, {{urn:schemas-microsoft-com:xml-diffgram-v1}id=d60428e5-9dbc-49c0-88e3-25f3a898746d32, {urn:schemas-microsoft-com:xml-msdata}rowOrder=31, {urn:schemas-microsoft-com:xml-diffgram-v1}hasChanges=inserted, ResidueWt=3500, CN2=79.75, Cona=6.6, U=8.2, OC=2, ResidueCNR=96, SWCon=0.36, DiffusConst=58, DiffusSlope=14}, {{urn:schemas-microsoft-com:xml-diffgram-v1}id=d60428e5-9dbc-49c0-88e3-25f3a898746d33, {urn:schemas-microsoft-com:xml-msdata}rowOrder=32, {urn:schemas-microsoft-com:xml-diffgram-v1}hasChanges=inserted, ResidueWt=3500, CN2=79.75, Cona=3.6, U=8.2, OC=2, ResidueCNR=96, SWCon=0.36, DiffusConst=58, DiffusSlope=14}, {{urn:schemas-microsoft-com:xml-diffgram-v1}id=d60428e5-9dbc-49c0-88e3-25f3a898746d34, {urn:schemas-microsoft-com:xml-msdata}rowOrder=33, {urn:schemas-microsoft-com:xml-diffgram-v1}hasChanges=inserted, ResidueWt=3500, CN2=79.75, Cona=3.6, U=8.2, OC=2, ResidueCNR=96, SWCon=0.16, DiffusConst=58, DiffusSlope=14}, {{urn:schemas-microsoft-com:xml-diffgram-v1}id=d60428e5-9dbc-49c0-88e3-25f3a898746d35, {urn:schemas-microsoft-com:xml-msdata}rowOrder=34, {urn:schemas-microsoft-com:xml-diffgram-v1}hasChanges=inserted, ResidueWt=3500, CN2=79.75, Cona=3.6, U=8.2, OC=2, ResidueCNR=56, SWCon=0.16, DiffusConst=58, DiffusSlope=14}, {{urn:schemas-microsoft-com:xml-diffgram-v1}id=d60428e5-9dbc-49c0-88e3-25f3a898746d36, {urn:schemas-microsoft-com:xml-msdata}rowOrder=35, {urn:schemas-microsoft-com:xml-diffgram-v1}hasChanges=inserted, ResidueWt=3500, CN2=79.75, Cona=3.6, U=8.2, OC=2, ResidueCNR=56, SWCon=0.16, DiffusConst=38, DiffusSlope=14}, {{urn:schemas-microsoft-com:xml-diffgram-v1}id=d60428e5-9dbc-49c0-88e3-25f3a898746d37, {urn:schemas-microsoft-com:xml-msdata}rowOrder=36, {urn:schemas-microsoft-com:xml-diffgram-v1}hasChanges=inserted, ResidueWt=3500, CN2=72.25, Cona=3.6, U=8.2, OC=2, ResidueCNR=56, SWCon=0.16, DiffusConst=38, DiffusSlope=14}, {{urn:schemas-microsoft-com:xml-diffgram-v1}id=d60428e5-9dbc-49c0-88e3-25f3a898746d38, {urn:schemas-microsoft-com:xml-msdata}rowOrder=37, {urn:schemas-microsoft-com:xml-diffgram-v1}hasChanges=inserted, ResidueWt=3500, CN2=72.25, Cona=3.6, U=8.2, OC=2, ResidueCNR=56, SWCon=0.16, DiffusConst=38, DiffusSlope=19}, {{urn:schemas-microsoft-com:xml-diffgram-v1}id=d60428e5-9dbc-49c0-88e3-25f3a898746d39, {urn:schemas-microsoft-com:xml-msdata}rowOrder=38, {urn:schemas-microsoft-com:xml-diffgram-v1}hasChanges=inserted, ResidueWt=1000, CN2=72.25, Cona=3.6, U=8.2, OC=2, ResidueCNR=56, SWCon=0.16, DiffusConst=38, DiffusSlope=19}, {{urn:schemas-microsoft-com:xml-diffgram-v1}id=d60428e5-9dbc-49c0-88e3-25f3a898746d40, {urn:schemas-microsoft-com:xml-msdata}rowOrder=39, {urn:schemas-microsoft-com:xml-diffgram-v1}hasChanges=inserted, ResidueWt=1000, CN2=72.25, Cona=3.6, U=8.2, OC=1.25, ResidueCNR=56, SWCon=0.16, DiffusConst=38, DiffusSlope=19}, {{urn:schemas-microsoft-com:xml-diffgram-v1}id=d60428e5-9dbc-49c0-88e3-25f3a898746d41, {urn:schemas-microsoft-com:xml-msdata}rowOrder=40, {urn:schemas-microsoft-com:xml-diffgram-v1}hasChanges=inserted, ResidueWt=1500, CN2=84.25, Cona=8.4, U=4.2, OC=1.1, ResidueCNR=112, SWCon=0.48, DiffusConst=56, DiffusSlope=11.5}, {{urn:schemas-microsoft-com:xml-diffgram-v1}id=d60428e5-9dbc-49c0-88e3-25f3a898746d42, {urn:schemas-microsoft-com:xml-msdata}rowOrder=41, {urn:schemas-microsoft-com:xml-diffgram-v1}hasChanges=inserted, ResidueWt=1500, CN2=84.25, Cona=8.4, U=4.2, OC=1.85, ResidueCNR=112, SWCon=0.48, DiffusConst=56, DiffusSlope=11.5}, {{urn:schemas-microsoft-com:xml-diffgram-v1}id=d60428e5-9dbc-49c0-88e3-25f3a898746d43, {urn:schemas-microsoft-com:xml-msdata}rowOrder=42, {urn:schemas-microsoft-com:xml-diffgram-v1}hasChanges=inserted, ResidueWt=1500, CN2=76.75, Cona=8.4, U=4.2, OC=1.85, ResidueCNR=112, SWCon=0.48, DiffusConst=56, DiffusSlope=11.5}, {{urn:schemas-microsoft-com:xml-diffgram-v1}id=d60428e5-9dbc-49c0-88e3-25f3a898746d44, {urn:schemas-microsoft-com:xml-msdata}rowOrder=43, {urn:schemas-microsoft-com:xml-diffgram-v1}hasChanges=inserted, ResidueWt=1500, CN2=76.75, Cona=8.4, U=4.2, OC=1.85, ResidueCNR=72, SWCon=0.48, DiffusConst=56, DiffusSlope=11.5}, {{urn:schemas-microsoft-com:xml-diffgram-v1}id=d60428e5-9dbc-49c0-88e3-25f3a898746d45, {urn:schemas-microsoft-com:xml-msdata}rowOrder=44, {urn:schemas-microsoft-com:xml-diffgram-v1}hasChanges=inserted, ResidueWt=1500, CN2=76.75, Cona=8.4, U=4.2, OC=1.85, ResidueCNR=72, SWCon=0.28, DiffusConst=56, DiffusSlope=11.5}, {{urn:schemas-microsoft-com:xml-diffgram-v1}id=d60428e5-9dbc-49c0-88e3-25f3a898746d46, {urn:schemas-microsoft-com:xml-msdata}rowOrder=45, {urn:schemas-microsoft-com:xml-diffgram-v1}hasChanges=inserted, ResidueWt=1500, CN2=76.75, Cona=8.4, U=4.2, OC=1.85, ResidueCNR=72, SWCon=0.28, DiffusConst=36, DiffusSlope=11.5}, {{urn:schemas-microsoft-com:xml-diffgram-v1}id=d60428e5-9dbc-49c0-88e3-25f3a898746d47, {urn:schemas-microsoft-com:xml-msdata}rowOrder=46, {urn:schemas-microsoft-com:xml-diffgram-v1}hasChanges=inserted, ResidueWt=1500, CN2=76.75, Cona=5.4, U=4.2, OC=1.85, ResidueCNR=72, SWCon=0.28, DiffusConst=36, DiffusSlope=11.5}, {{urn:schemas-microsoft-com:xml-diffgram-v1}id=d60428e5-9dbc-49c0-88e3-25f3a898746d48, {urn:schemas-microsoft-com:xml-msdata}rowOrder=47, {urn:schemas-microsoft-com:xml-diffgram-v1}hasChanges=inserted, ResidueWt=4000, CN2=76.75, Cona=5.4, U=4.2, OC=1.85, ResidueCNR=72, SWCon=0.28, DiffusConst=36, DiffusSlope=11.5}, {{urn:schemas-microsoft-com:xml-diffgram-v1}id=d60428e5-9dbc-49c0-88e3-25f3a898746d49, {urn:schemas-microsoft-com:xml-msdata}rowOrder=48, {urn:schemas-microsoft-com:xml-diffgram-v1}hasChanges=inserted, ResidueWt=4000, CN2=76.75, Cona=5.4, U=4.2, OC=1.85, ResidueCNR=72, SWCon=0.28, DiffusConst=36, DiffusSlope=16.5}, {{urn:schemas-microsoft-com:xml-diffgram-v1}id=d60428e5-9dbc-49c0-88e3-25f3a898746d50, {urn:schemas-microsoft-com:xml-msdata}rowOrder=49, {urn:schemas-microsoft-com:xml-diffgram-v1}hasChanges=inserted, ResidueWt=4000, CN2=76.75, Cona=5.4, U=8.2, OC=1.85, ResidueCNR=72, SWCon=0.28, DiffusConst=36, DiffusSlope=16.5}, {{urn:schemas-microsoft-com:xml-diffgram-v1}id=d60428e5-9dbc-49c0-88e3-25f3a898746d51, {urn:schemas-microsoft-com:xml-msdata}rowOrder=50, {urn:schemas-microsoft-com:xml-diffgram-v1}hasChanges=inserted, ResidueWt=4000, CN2=84.25, Cona=4.5, U=5.4, OC=0.95, ResidueCNR=60, SWCon=0.12, DiffusConst=24, DiffusSlope=10.5}, {{urn:schemas-microsoft-com:xml-diffgram-v1}id=d60428e5-9dbc-49c0-88e3-25f3a898746d52, {urn:schemas-microsoft-com:xml-msdata}rowOrder=51, {urn:schemas-microsoft-com:xml-diffgram-v1}hasChanges=inserted, ResidueWt=4000, CN2=84.25, Cona=7.5, U=5.4, OC=0.95, ResidueCNR=60, SWCon=0.12, DiffusConst=24, DiffusSlope=10.5}, {{urn:schemas-microsoft-com:xml-diffgram-v1}id=d60428e5-9dbc-49c0-88e3-25f3a898746d53, {urn:schemas-microsoft-com:xml-msdata}rowOrder=52, {urn:schemas-microsoft-com:xml-diffgram-v1}hasChanges=inserted, ResidueWt=4000, CN2=84.25, Cona=7.5, U=1.4, OC=0.95, ResidueCNR=60, SWCon=0.12, DiffusConst=24, DiffusSlope=10.5}, {{urn:schemas-microsoft-com:xml-diffgram-v1}id=d60428e5-9dbc-49c0-88e3-25f3a898746d54, {urn:schemas-microsoft-com:xml-msdata}rowOrder=53, {urn:schemas-microsoft-com:xml-diffgram-v1}hasChanges=inserted, ResidueWt=4000, CN2=84.25, Cona=7.5, U=1.4, OC=0.95, ResidueCNR=100, SWCon=0.12, DiffusConst=24, DiffusSlope=10.5}, {{urn:schemas-microsoft-com:xml-diffgram-v1}id=d60428e5-9dbc-49c0-88e3-25f3a898746d55, {urn:schemas-microsoft-com:xml-msdata}rowOrder=54, {urn:schemas-microsoft-com:xml-diffgram-v1}hasChanges=inserted, ResidueWt=4000, CN2=84.25, Cona=7.5, U=1.4, OC=0.95, ResidueCNR=100, SWCon=0.12, DiffusConst=24, DiffusSlope=15.5}, {{urn:schemas-microsoft-com:xml-diffgram-v1}id=d60428e5-9dbc-49c0-88e3-25f3a898746d56, {urn:schemas-microsoft-com:xml-msdata}rowOrder=55, {urn:schemas-microsoft-com:xml-diffgram-v1}hasChanges=inserted, ResidueWt=4000, CN2=76.75, Cona=7.5, U=1.4, OC=0.95, ResidueCNR=100, SWCon=0.12, DiffusConst=24, DiffusSlope=15.5}, {{urn:schemas-microsoft-com:xml-diffgram-v1}id=d60428e5-9dbc-49c0-88e3-25f3a898746d57, {urn:schemas-microsoft-com:xml-msdata}rowOrder=56, {urn:schemas-microsoft-com:xml-diffgram-v1}hasChanges=inserted, ResidueWt=4000, CN2=76.75, Cona=7.5, U=1.4, OC=0.95, ResidueCNR=100, SWCon=0.32, DiffusConst=24, DiffusSlope=15.5}, {{urn:schemas-microsoft-com:xml-diffgram-v1}id=d60428e5-9dbc-49c0-88e3-25f3a898746d58, {urn:schemas-microsoft-com:xml-msdata}rowOrder=57, {urn:schemas-microsoft-com:xml-diffgram-v1}hasChanges=inserted, ResidueWt=4000, CN2=76.75, Cona=7.5, U=1.4, OC=0.95, ResidueCNR=100, SWCon=0.32, DiffusConst=44, DiffusSlope=15.5}, {{urn:schemas-microsoft-com:xml-diffgram-v1}id=d60428e5-9dbc-49c0-88e3-25f3a898746d59, {urn:schemas-microsoft-com:xml-msdata}rowOrder=58, {urn:schemas-microsoft-com:xml-diffgram-v1}hasChanges=inserted, ResidueWt=4000, CN2=76.75, Cona=7.5, U=1.4, OC=1.7, ResidueCNR=100, SWCon=0.32, DiffusConst=44, DiffusSlope=15.5}, {{urn:schemas-microsoft-com:xml-diffgram-v1}id=d60428e5-9dbc-49c0-88e3-25f3a898746d60, {urn:schemas-microsoft-com:xml-msdata}rowOrder=59, {urn:schemas-microsoft-com:xml-diffgram-v1}hasChanges=inserted, ResidueWt=1500, CN2=76.75, Cona=7.5, U=1.4, OC=1.7, ResidueCNR=100, SWCon=0.32, DiffusConst=44, DiffusSlope=15.5}, {{urn:schemas-microsoft-com:xml-diffgram-v1}id=d60428e5-9dbc-49c0-88e3-25f3a898746d61, {urn:schemas-microsoft-com:xml-msdata}rowOrder=60, {urn:schemas-microsoft-com:xml-diffgram-v1}hasChanges=inserted, ResidueWt=2500, CN2=71.5, Cona=9, U=3.8, OC=1.1, ResidueCNR=96, SWCon=0.48, DiffusConst=44, DiffusSlope=15}, {{urn:schemas-microsoft-com:xml-diffgram-v1}id=d60428e5-9dbc-49c0-88e3-25f3a898746d62, {urn:schemas-microsoft-com:xml-msdata}rowOrder=61, {urn:schemas-microsoft-com:xml-diffgram-v1}hasChanges=inserted, ResidueWt=5000, CN2=71.5, Cona=9, U=3.8, OC=1.1, ResidueCNR=96, SWCon=0.48, DiffusConst=44, DiffusSlope=15}, {{urn:schemas-microsoft-com:xml-diffgram-v1}id=d60428e5-9dbc-49c0-88e3-25f3a898746d63, {urn:schemas-microsoft-com:xml-msdata}rowOrder=62, {urn:schemas-microsoft-com:xml-diffgram-v1}hasChanges=inserted, ResidueWt=5000, CN2=71.5, Cona=6, U=3.8, OC=1.1, ResidueCNR=96, SWCon=0.48, DiffusConst=44, DiffusSlope=15}, {{urn:schemas-microsoft-com:xml-diffgram-v1}id=d60428e5-9dbc-49c0-88e3-25f3a898746d64, {urn:schemas-microsoft-com:xml-msdata}rowOrder=63, {urn:schemas-microsoft-com:xml-diffgram-v1}hasChanges=inserted, ResidueWt=5000, CN2=71.5, Cona=6, U=3.8, OC=1.1, ResidueCNR=96, SWCon=0.48, DiffusConst=24, DiffusSlope=15}, {{urn:schemas-microsoft-com:xml-diffgram-v1}id=d60428e5-9dbc-49c0-88e3-25f3a898746d65, {urn:schemas-microsoft-com:xml-msdata}rowOrder=64, {urn:schemas-microsoft-com:xml-diffgram-v1}hasChanges=inserted, ResidueWt=5000, CN2=71.5, Cona=6, U=3.8, OC=1.1, ResidueCNR=56, SWCon=0.48, DiffusConst=24, DiffusSlope=15}, {{urn:schemas-microsoft-com:xml-diffgram-v1}id=d60428e5-9dbc-49c0-88e3-25f3a898746d66, {urn:schemas-microsoft-com:xml-msdata}rowOrder=65, {urn:schemas-microsoft-com:xml-diffgram-v1}hasChanges=inserted, ResidueWt=5000, CN2=71.5, Cona=6, U=3.8, OC=1.85, ResidueCNR=56, SWCon=0.48, DiffusConst=24, DiffusSlope=15}, {{urn:schemas-microsoft-com:xml-diffgram-v1}id=d60428e5-9dbc-49c0-88e3-25f3a898746d67, {urn:schemas-microsoft-com:xml-msdata}rowOrder=66, {urn:schemas-microsoft-com:xml-diffgram-v1}hasChanges=inserted, ResidueWt=5000, CN2=71.5, Cona=6, U=7.8, OC=1.85, ResidueCNR=56, SWCon=0.48, DiffusConst=24, DiffusSlope=15}, {{urn:schemas-microsoft-com:xml-diffgram-v1}id=d60428e5-9dbc-49c0-88e3-25f3a898746d68, {urn:schemas-microsoft-com:xml-msdata}rowOrder=67, {urn:schemas-microsoft-com:xml-diffgram-v1}hasChanges=inserted, ResidueWt=5000, CN2=79, Cona=6, U=7.8, OC=1.85, ResidueCNR=56, SWCon=0.48, DiffusConst=24, DiffusSlope=15}, {{urn:schemas-microsoft-com:xml-diffgram-v1}id=d60428e5-9dbc-49c0-88e3-25f3a898746d69, {urn:schemas-microsoft-com:xml-msdata}rowOrder=68, {urn:schemas-microsoft-com:xml-diffgram-v1}hasChanges=inserted, ResidueWt=5000, CN2=79, Cona=6, U=7.8, OC=1.85, ResidueCNR=56, SWCon=0.48, DiffusConst=24, DiffusSlope=10}, {{urn:schemas-microsoft-com:xml-diffgram-v1}id=d60428e5-9dbc-49c0-88e3-25f3a898746d70, {urn:schemas-microsoft-com:xml-msdata}rowOrder=69, {urn:schemas-microsoft-com:xml-diffgram-v1}hasChanges=inserted, ResidueWt=5000, CN2=79, Cona=6, U=7.8, OC=1.85, ResidueCNR=56, SWCon=0.28, DiffusConst=24, DiffusSlope=10}, {{urn:schemas-microsoft-com:xml-diffgram-v1}id=d60428e5-9dbc-49c0-88e3-25f3a898746d71, {urn:schemas-microsoft-com:xml-msdata}rowOrder=70, {urn:schemas-microsoft-com:xml-diffgram-v1}hasChanges=inserted, ResidueWt=750, CN2=76, Cona=8.4, U=5, OC=1.325, ResidueCNR=80, SWCon=0.3, DiffusConst=34, DiffusSlope=17}, {{urn:schemas-microsoft-com:xml-diffgram-v1}id=d60428e5-9dbc-49c0-88e3-25f3a898746d72, {urn:schemas-microsoft-com:xml-msdata}rowOrder=71, {urn:schemas-microsoft-com:xml-diffgram-v1}hasChanges=inserted, ResidueWt=3250, CN2=76, Cona=8.4, U=5, OC=1.325, ResidueCNR=80, SWCon=0.3, DiffusConst=34, DiffusSlope=17}, {{urn:schemas-microsoft-com:xml-diffgram-v1}id=d60428e5-9dbc-49c0-88e3-25f3a898746d73, {urn:schemas-microsoft-com:xml-msdata}rowOrder=72, {urn:schemas-microsoft-com:xml-diffgram-v1}hasChanges=inserted, ResidueWt=3250, CN2=76, Cona=5.4, U=5, OC=1.325, ResidueCNR=80, SWCon=0.3, DiffusConst=34, DiffusSlope=17}, {{urn:schemas-microsoft-com:xml-diffgram-v1}id=d60428e5-9dbc-49c0-88e3-25f3a898746d74, {urn:schemas-microsoft-com:xml-msdata}rowOrder=73, {urn:schemas-microsoft-com:xml-diffgram-v1}hasChanges=inserted, ResidueWt=3250, CN2=76, Cona=5.4, U=5, OC=0.575, ResidueCNR=80, SWCon=0.3, DiffusConst=34, DiffusSlope=17}, {{urn:schemas-microsoft-com:xml-diffgram-v1}id=d60428e5-9dbc-49c0-88e3-25f3a898746d75, {urn:schemas-microsoft-com:xml-msdata}rowOrder=74, {urn:schemas-microsoft-com:xml-diffgram-v1}hasChanges=inserted, ResidueWt=3250, CN2=83.5, Cona=5.4, U=5, OC=0.575, ResidueCNR=80, SWCon=0.3, DiffusConst=34, DiffusSlope=17}, {{urn:schemas-microsoft-com:xml-diffgram-v1}id=d60428e5-9dbc-49c0-88e3-25f3a898746d76, {urn:schemas-microsoft-com:xml-msdata}rowOrder=75, {urn:schemas-microsoft-com:xml-diffgram-v1}hasChanges=inserted, ResidueWt=3250, CN2=83.5, Cona=5.4, U=5, OC=0.575, ResidueCNR=40, SWCon=0.3, DiffusConst=34, DiffusSlope=17}, {{urn:schemas-microsoft-com:xml-diffgram-v1}id=d60428e5-9dbc-49c0-88e3-25f3a898746d77, {urn:schemas-microsoft-com:xml-msdata}rowOrder=76, {urn:schemas-microsoft-com:xml-diffgram-v1}hasChanges=inserted, ResidueWt=3250, CN2=83.5, Cona=5.4, U=9, OC=0.575, ResidueCNR=40, SWCon=0.3, DiffusConst=34, DiffusSlope=17}, {{urn:schemas-microsoft-com:xml-diffgram-v1}id=d60428e5-9dbc-49c0-88e3-25f3a898746d78, {urn:schemas-microsoft-com:xml-msdata}rowOrder=77, {urn:schemas-microsoft-com:xml-diffgram-v1}hasChanges=inserted, ResidueWt=3250, CN2=83.5, Cona=5.4, U=9, OC=0.575, ResidueCNR=40, SWCon=0.3, DiffusConst=34, DiffusSlope=12}, {{urn:schemas-microsoft-com:xml-diffgram-v1}id=d60428e5-9dbc-49c0-88e3-25f3a898746d79, {urn:schemas-microsoft-com:xml-msdata}rowOrder=78, {urn:schemas-microsoft-com:xml-diffgram-v1}hasChanges=inserted, ResidueWt=3250, CN2=83.5, Cona=5.4, U=9, OC=0.575, ResidueCNR=40, SWCon=0.3, DiffusConst=54, DiffusSlope=12}, {{urn:schemas-microsoft-com:xml-diffgram-v1}id=d60428e5-9dbc-49c0-88e3-25f3a898746d80, {urn:schemas-microsoft-com:xml-msdata}rowOrder=79, {urn:schemas-microsoft-com:xml-diffgram-v1}hasChanges=inserted, ResidueWt=3250, CN2=83.5, Cona=5.4, U=9, OC=0.575, ResidueCNR=40, SWCon=0.1, DiffusConst=54, DiffusSlope=12}, {{urn:schemas-microsoft-com:xml-diffgram-v1}id=d60428e5-9dbc-49c0-88e3-25f3a898746d81, {urn:schemas-microsoft-com:xml-msdata}rowOrder=80, {urn:schemas-microsoft-com:xml-diffgram-v1}hasChanges=inserted, ResidueWt=4750, CN2=74.5, Cona=5.1, U=5, OC=1.85, ResidueCNR=80, SWCon=0.12, DiffusConst=36, DiffusSlope=15}, {{urn:schemas-microsoft-com:xml-diffgram-v1}id=d60428e5-9dbc-49c0-88e3-25f3a898746d82, {urn:schemas-microsoft-com:xml-msdata}rowOrder=81, {urn:schemas-microsoft-com:xml-diffgram-v1}hasChanges=inserted, ResidueWt=4750, CN2=74.5, Cona=5.1, U=5, OC=1.85, ResidueCNR=120, SWCon=0.12, DiffusConst=36, DiffusSlope=15}, {{urn:schemas-microsoft-com:xml-diffgram-v1}id=d60428e5-9dbc-49c0-88e3-25f3a898746d83, {urn:schemas-microsoft-com:xml-msdata}rowOrder=82, {urn:schemas-microsoft-com:xml-diffgram-v1}hasChanges=inserted, ResidueWt=4750, CN2=74.5, Cona=5.1, U=1, OC=1.85, ResidueCNR=120, SWCon=0.12, DiffusConst=36, DiffusSlope=15}, {{urn:schemas-microsoft-com:xml-diffgram-v1}id=d60428e5-9dbc-49c0-88e3-25f3a898746d84, {urn:schemas-microsoft-com:xml-msdata}rowOrder=83, {urn:schemas-microsoft-com:xml-diffgram-v1}hasChanges=inserted, ResidueWt=4750, CN2=74.5, Cona=5.1, U=1, OC=1.1, ResidueCNR=120, SWCon=0.12, DiffusConst=36, DiffusSlope=15}, {{urn:schemas-microsoft-com:xml-diffgram-v1}id=d60428e5-9dbc-49c0-88e3-25f3a898746d85, {urn:schemas-microsoft-com:xml-msdata}rowOrder=84, {urn:schemas-microsoft-com:xml-diffgram-v1}hasChanges=inserted, ResidueWt=2250, CN2=74.5, Cona=5.1, U=1, OC=1.1, ResidueCNR=120, SWCon=0.12, DiffusConst=36, DiffusSlope=15}, {{urn:schemas-microsoft-com:xml-diffgram-v1}id=d60428e5-9dbc-49c0-88e3-25f3a898746d86, {urn:schemas-microsoft-com:xml-msdata}rowOrder=85, {urn:schemas-microsoft-com:xml-diffgram-v1}hasChanges=inserted, ResidueWt=2250, CN2=74.5, Cona=5.1, U=1, OC=1.1, ResidueCNR=120, SWCon=0.12, DiffusConst=36, DiffusSlope=20}, {{urn:schemas-microsoft-com:xml-diffgram-v1}id=d60428e5-9dbc-49c0-88e3-25f3a898746d87, {urn:schemas-microsoft-com:xml-msdata}rowOrder=86, {urn:schemas-microsoft-com:xml-diffgram-v1}hasChanges=inserted, ResidueWt=2250, CN2=74.5, Cona=5.1, U=1, OC=1.1, ResidueCNR=120, SWCon=0.32, DiffusConst=36, DiffusSlope=20}, {{urn:schemas-microsoft-com:xml-diffgram-v1}id=d60428e5-9dbc-49c0-88e3-25f3a898746d88, {urn:schemas-microsoft-com:xml-msdata}rowOrder=87, {urn:schemas-microsoft-com:xml-diffgram-v1}hasChanges=inserted, ResidueWt=2250, CN2=74.5, Cona=8.1, U=1, OC=1.1, ResidueCNR=120, SWCon=0.32, DiffusConst=36, DiffusSlope=20}, {{urn:schemas-microsoft-com:xml-diffgram-v1}id=d60428e5-9dbc-49c0-88e3-25f3a898746d89, {urn:schemas-microsoft-com:xml-msdata}rowOrder=88, {urn:schemas-microsoft-com:xml-diffgram-v1}hasChanges=inserted, ResidueWt=2250, CN2=74.5, Cona=8.1, U=1, OC=1.1, ResidueCNR=120, SWCon=0.32, DiffusConst=56, DiffusSlope=20}, {{urn:schemas-microsoft-com:xml-diffgram-v1}id=d60428e5-9dbc-49c0-88e3-25f3a898746d90, {urn:schemas-microsoft-com:xml-msdata}rowOrder=89, {urn:schemas-microsoft-com:xml-diffgram-v1}hasChanges=inserted, ResidueWt=2250, CN2=82, Cona=8.1, U=1, OC=1.1, ResidueCNR=120, SWCon=0.32, DiffusConst=56, DiffusSlope=20}, {{urn:schemas-microsoft-com:xml-diffgram-v1}id=d60428e5-9dbc-49c0-88e3-25f3a898746d91, {urn:schemas-microsoft-com:xml-msdata}rowOrder=90, {urn:schemas-microsoft-com:xml-diffgram-v1}hasChanges=inserted, ResidueWt=2750, CN2=83.5, Cona=6.3, U=5, OC=1.475, ResidueCNR=120, SWCon=0.26, DiffusConst=40, DiffusSlope=16}, {{urn:schemas-microsoft-com:xml-diffgram-v1}id=d60428e5-9dbc-49c0-88e3-25f3a898746d92, {urn:schemas-microsoft-com:xml-msdata}rowOrder=91, {urn:schemas-microsoft-com:xml-diffgram-v1}hasChanges=inserted, ResidueWt=2750, CN2=83.5, Cona=6.3, U=5, OC=1.475, ResidueCNR=120, SWCon=0.46, DiffusConst=40, DiffusSlope=16}, {{urn:schemas-microsoft-com:xml-diffgram-v1}id=d60428e5-9dbc-49c0-88e3-25f3a898746d93, {urn:schemas-microsoft-com:xml-msdata}rowOrder=92, {urn:schemas-microsoft-com:xml-diffgram-v1}hasChanges=inserted, ResidueWt=2750, CN2=83.5, Cona=3.3, U=5, OC=1.475, ResidueCNR=120, SWCon=0.46, DiffusConst=40, DiffusSlope=16}, {{urn:schemas-microsoft-com:xml-diffgram-v1}id=d60428e5-9dbc-49c0-88e3-25f3a898746d94, {urn:schemas-microsoft-com:xml-msdata}rowOrder=93, {urn:schemas-microsoft-com:xml-diffgram-v1}hasChanges=inserted, ResidueWt=2750, CN2=83.5, Cona=3.3, U=1, OC=1.475, ResidueCNR=120, SWCon=0.46, DiffusConst=40, DiffusSlope=16}, {{urn:schemas-microsoft-com:xml-diffgram-v1}id=d60428e5-9dbc-49c0-88e3-25f3a898746d95, {urn:schemas-microsoft-com:xml-msdata}rowOrder=94, {urn:schemas-microsoft-com:xml-diffgram-v1}hasChanges=inserted, ResidueWt=2750, CN2=83.5, Cona=3.3, U=1, OC=1.475, ResidueCNR=80, SWCon=0.46, DiffusConst=40, DiffusSlope=16}, {{urn:schemas-microsoft-com:xml-diffgram-v1}id=d60428e5-9dbc-49c0-88e3-25f3a898746d96, {urn:schemas-microsoft-com:xml-msdata}rowOrder=95, {urn:schemas-microsoft-com:xml-diffgram-v1}hasChanges=inserted, ResidueWt=2750, CN2=76, Cona=3.3, U=1, OC=1.475, ResidueCNR=80, SWCon=0.46, DiffusConst=40, DiffusSlope=16}, {{urn:schemas-microsoft-com:xml-diffgram-v1}id=d60428e5-9dbc-49c0-88e3-25f3a898746d97, {urn:schemas-microsoft-com:xml-msdata}rowOrder=96, {urn:schemas-microsoft-com:xml-diffgram-v1}hasChanges=inserted, ResidueWt=2750, CN2=76, Cona=3.3, U=1, OC=0.725, ResidueCNR=80, SWCon=0.46, DiffusConst=40, DiffusSlope=16}, {{urn:schemas-microsoft-com:xml-diffgram-v1}id=d60428e5-9dbc-49c0-88e3-25f3a898746d98, {urn:schemas-microsoft-com:xml-msdata}rowOrder=97, {urn:schemas-microsoft-com:xml-diffgram-v1}hasChanges=inserted, ResidueWt=250, CN2=76, Cona=3.3, U=1, OC=0.725, ResidueCNR=80, SWCon=0.46, DiffusConst=40, DiffusSlope=16}, {{urn:schemas-microsoft-com:xml-diffgram-v1}id=d60428e5-9dbc-49c0-88e3-25f3a898746d99, {urn:schemas-microsoft-com:xml-msdata}rowOrder=98, {urn:schemas-microsoft-com:xml-diffgram-v1}hasChanges=inserted, ResidueWt=250, CN2=76, Cona=3.3, U=1, OC=0.725, ResidueCNR=80, SWCon=0.46, DiffusConst=40, DiffusSlope=11}, {{urn:schemas-microsoft-com:xml-diffgram-v1}id=d60428e5-9dbc-49c0-88e3-25f3a898746d100, {urn:schemas-microsoft-com:xml-msdata}rowOrder=99, {urn:schemas-microsoft-com:xml-diffgram-v1}hasChanges=inserted, ResidueWt=250, CN2=76, Cona=3.3, U=1, OC=0.725, ResidueCNR=80, SWCon=0.46, DiffusConst=20, DiffusSlope=11}, {{urn:schemas-microsoft-com:xml-diffgram-v1}id=d60428e5-9dbc-49c0-88e3-25f3a898746d101, {urn:schemas-microsoft-com:xml-msdata}rowOrder=100, {urn:schemas-microsoft-com:xml-diffgram-v1}hasChanges=inserted, ResidueWt=0, CN2=78.25, Cona=4.8, U=5.8, OC=1.25, ResidueCNR=84, SWCon=0.5, DiffusConst=50, DiffusSlope=19}, {{urn:schemas-microsoft-com:xml-diffgram-v1}id=d60428e5-9dbc-49c0-88e3-25f3a898746d102, {urn:schemas-microsoft-com:xml-msdata}rowOrder=101, {urn:schemas-microsoft-com:xml-diffgram-v1}hasChanges=inserted, ResidueWt=0, CN2=78.25, Cona=4.8, U=5.8, OC=1.25, ResidueCNR=44, SWCon=0.5, DiffusConst=50, DiffusSlope=19}, {{urn:schemas-microsoft-com:xml-diffgram-v1}id=d60428e5-9dbc-49c0-88e3-25f3a898746d103, {urn:schemas-microsoft-com:xml-msdata}rowOrder=102, {urn:schemas-microsoft-com:xml-diffgram-v1}hasChanges=inserted, ResidueWt=0, CN2=78.25, Cona=4.8, U=5.8, OC=1.25, ResidueCNR=44, SWCon=0.3, DiffusConst=50, DiffusSlope=19}, {{urn:schemas-microsoft-com:xml-diffgram-v1}id=d60428e5-9dbc-49c0-88e3-25f3a898746d104, {urn:schemas-microsoft-com:xml-msdata}rowOrder=103, {urn:schemas-microsoft-com:xml-diffgram-v1}hasChanges=inserted, ResidueWt=0, CN2=78.25, Cona=4.8, U=5.8, OC=1.25, ResidueCNR=44, SWCon=0.3, DiffusConst=30, DiffusSlope=19}, {{urn:schemas-microsoft-com:xml-diffgram-v1}id=d60428e5-9dbc-49c0-88e3-25f3a898746d105, {urn:schemas-microsoft-com:xml-msdata}rowOrder=104, {urn:schemas-microsoft-com:xml-diffgram-v1}hasChanges=inserted, ResidueWt=0, CN2=70.75, Cona=4.8, U=5.8, OC=1.25, ResidueCNR=44, SWCon=0.3, DiffusConst=30, DiffusSlope=19}, {{urn:schemas-microsoft-com:xml-diffgram-v1}id=d60428e5-9dbc-49c0-88e3-25f3a898746d106, {urn:schemas-microsoft-com:xml-msdata}rowOrder=105, {urn:schemas-microsoft-com:xml-diffgram-v1}hasChanges=inserted, ResidueWt=0, CN2=70.75, Cona=4.8, U=1.8, OC=1.25, ResidueCNR=44, SWCon=0.3, DiffusConst=30, DiffusSlope=19}, {{urn:schemas-microsoft-com:xml-diffgram-v1}id=d60428e5-9dbc-49c0-88e3-25f3a898746d107, {urn:schemas-microsoft-com:xml-msdata}rowOrder=106, {urn:schemas-microsoft-com:xml-diffgram-v1}hasChanges=inserted, ResidueWt=0, CN2=70.75, Cona=4.8, U=1.8, OC=2, ResidueCNR=44, SWCon=0.3, DiffusConst=30, DiffusSlope=19}, {{urn:schemas-microsoft-com:xml-diffgram-v1}id=d60428e5-9dbc-49c0-88e3-25f3a898746d108, {urn:schemas-microsoft-com:xml-msdata}rowOrder=107, {urn:schemas-microsoft-com:xml-diffgram-v1}hasChanges=inserted, ResidueWt=0, CN2=70.75, Cona=4.8, U=1.8, OC=2, ResidueCNR=44, SWCon=0.3, DiffusConst=30, DiffusSlope=14}, {{urn:schemas-microsoft-com:xml-diffgram-v1}id=d60428e5-9dbc-49c0-88e3-25f3a898746d109, {urn:schemas-microsoft-com:xml-msdata}rowOrder=108, {urn:schemas-microsoft-com:xml-diffgram-v1}hasChanges=inserted, ResidueWt=2500, CN2=70.75, Cona=4.8, U=1.8, OC=2, ResidueCNR=44, SWCon=0.3, DiffusConst=30, DiffusSlope=14}, {{urn:schemas-microsoft-com:xml-diffgram-v1}id=d60428e5-9dbc-49c0-88e3-25f3a898746d110, {urn:schemas-microsoft-com:xml-msdata}rowOrder=109, {urn:schemas-microsoft-com:xml-diffgram-v1}hasChanges=inserted, ResidueWt=2500, CN2=70.75, Cona=7.8, U=1.8, OC=2, ResidueCNR=44, SWCon=0.3, DiffusConst=30, DiffusSlope=14}, {{urn:schemas-microsoft-com:xml-diffgram-v1}id=d60428e5-9dbc-49c0-88e3-25f3a898746d111, {urn:schemas-microsoft-com:xml-msdata}rowOrder=110, {urn:schemas-microsoft-com:xml-diffgram-v1}hasChanges=inserted, ResidueWt=3250, CN2=75.25, Cona=6.6, U=7, OC=1.625, ResidueCNR=120, SWCon=0.18, DiffusConst=52, DiffusSlope=13.5}, {{urn:schemas-microsoft-com:xml-diffgram-v1}id=d60428e5-9dbc-49c0-88e3-25f3a898746d112, {urn:schemas-microsoft-com:xml-msdata}rowOrder=111, {urn:schemas-microsoft-com:xml-diffgram-v1}hasChanges=inserted, ResidueWt=3250, CN2=75.25, Cona=3.6, U=7, OC=1.625, ResidueCNR=120, SWCon=0.18, DiffusConst=52, DiffusSlope=13.5}, {{urn:schemas-microsoft-com:xml-diffgram-v1}id=d60428e5-9dbc-49c0-88e3-25f3a898746d113, {urn:schemas-microsoft-com:xml-msdata}rowOrder=112, {urn:schemas-microsoft-com:xml-diffgram-v1}hasChanges=inserted, ResidueWt=3250, CN2=75.25, Cona=3.6, U=7, OC=1.625, ResidueCNR=120, SWCon=0.38, DiffusConst=52, DiffusSlope=13.5}, {{urn:schemas-microsoft-com:xml-diffgram-v1}id=d60428e5-9dbc-49c0-88e3-25f3a898746d114, {urn:schemas-microsoft-com:xml-msdata}rowOrder=113, {urn:schemas-microsoft-com:xml-diffgram-v1}hasChanges=inserted, ResidueWt=3250, CN2=75.25, Cona=3.6, U=7, OC=1.625, ResidueCNR=120, SWCon=0.38, DiffusConst=52, DiffusSlope=18.5}, {{urn:schemas-microsoft-com:xml-diffgram-v1}id=d60428e5-9dbc-49c0-88e3-25f3a898746d115, {urn:schemas-microsoft-com:xml-msdata}rowOrder=114, {urn:schemas-microsoft-com:xml-diffgram-v1}hasChanges=inserted, ResidueWt=3250, CN2=75.25, Cona=3.6, U=7, OC=1.625, ResidueCNR=80, SWCon=0.38, DiffusConst=52, DiffusSlope=18.5}, {{urn:schemas-microsoft-com:xml-diffgram-v1}id=d60428e5-9dbc-49c0-88e3-25f3a898746d116, {urn:schemas-microsoft-com:xml-msdata}rowOrder=115, {urn:schemas-microsoft-com:xml-diffgram-v1}hasChanges=inserted, ResidueWt=3250, CN2=75.25, Cona=3.6, U=7, OC=0.875, ResidueCNR=80, SWCon=0.38, DiffusConst=52, DiffusSlope=18.5}, {{urn:schemas-microsoft-com:xml-diffgram-v1}id=d60428e5-9dbc-49c0-88e3-25f3a898746d117, {urn:schemas-microsoft-com:xml-msdata}rowOrder=116, {urn:schemas-microsoft-com:xml-diffgram-v1}hasChanges=inserted, ResidueWt=3250, CN2=82.75, Cona=3.6, U=7, OC=0.875, ResidueCNR=80, SWCon=0.38, DiffusConst=52, DiffusSlope=18.5}, {{urn:schemas-microsoft-com:xml-diffgram-v1}id=d60428e5-9dbc-49c0-88e3-25f3a898746d118, {urn:schemas-microsoft-com:xml-msdata}rowOrder=117, {urn:schemas-microsoft-com:xml-diffgram-v1}hasChanges=inserted, ResidueWt=3250, CN2=82.75, Cona=3.6, U=7, OC=0.875, ResidueCNR=80, SWCon=0.38, DiffusConst=32, DiffusSlope=18.5}, {{urn:schemas-microsoft-com:xml-diffgram-v1}id=d60428e5-9dbc-49c0-88e3-25f3a898746d119, {urn:schemas-microsoft-com:xml-msdata}rowOrder=118, {urn:schemas-microsoft-com:xml-diffgram-v1}hasChanges=inserted, ResidueWt=750, CN2=82.75, Cona=3.6, U=7, OC=0.875, ResidueCNR=80, SWCon=0.38, DiffusConst=32, DiffusSlope=18.5}, {{urn:schemas-microsoft-com:xml-diffgram-v1}id=d60428e5-9dbc-49c0-88e3-25f3a898746d120, {urn:schemas-microsoft-com:xml-msdata}rowOrder=119, {urn:schemas-microsoft-com:xml-diffgram-v1}hasChanges=inserted, ResidueWt=750, CN2=82.75, Cona=3.6, U=3, OC=0.875, ResidueCNR=80, SWCon=0.38, DiffusConst=32, DiffusSlope=18.5}, {{urn:schemas-microsoft-com:xml-diffgram-v1}id=d60428e5-9dbc-49c0-88e3-25f3a898746d121, {urn:schemas-microsoft-com:xml-msdata}rowOrder=120, {urn:schemas-microsoft-com:xml-diffgram-v1}hasChanges=inserted, ResidueWt=2750, CN2=78.25, Cona=8.7, U=5.4, OC=1.625, ResidueCNR=92, SWCon=0.18, DiffusConst=60, DiffusSlope=14.5}, {{urn:schemas-microsoft-com:xml-diffgram-v1}id=d60428e5-9dbc-49c0-88e3-25f3a898746d122, {urn:schemas-microsoft-com:xml-msdata}rowOrder=121, {urn:schemas-microsoft-com:xml-diffgram-v1}hasChanges=inserted, ResidueWt=2750, CN2=78.25, Cona=8.7, U=5.4, OC=1.625, ResidueCNR=92, SWCon=0.38, DiffusConst=60, DiffusSlope=14.5}, {{urn:schemas-microsoft-com:xml-diffgram-v1}id=d60428e5-9dbc-49c0-88e3-25f3a898746d123, {urn:schemas-microsoft-com:xml-msdata}rowOrder=122, {urn:schemas-microsoft-com:xml-diffgram-v1}hasChanges=inserted, ResidueWt=2750, CN2=78.25, Cona=8.7, U=5.4, OC=1.625, ResidueCNR=52, SWCon=0.38, DiffusConst=60, DiffusSlope=14.5}, {{urn:schemas-microsoft-com:xml-diffgram-v1}id=d60428e5-9dbc-49c0-88e3-25f3a898746d124, {urn:schemas-microsoft-com:xml-msdata}rowOrder=123, {urn:schemas-microsoft-com:xml-diffgram-v1}hasChanges=inserted, ResidueWt=2750, CN2=78.25, Cona=8.7, U=5.4, OC=1.625, ResidueCNR=52, SWCon=0.38, DiffusConst=60, DiffusSlope=19.5}, {{urn:schemas-microsoft-com:xml-diffgram-v1}id=d60428e5-9dbc-49c0-88e3-25f3a898746d125, {urn:schemas-microsoft-com:xml-msdata}rowOrder=124, {urn:schemas-microsoft-com:xml-diffgram-v1}hasChanges=inserted, ResidueWt=2750, CN2=70.75, Cona=8.7, U=5.4, OC=1.625, ResidueCNR=52, SWCon=0.38, DiffusConst=60, DiffusSlope=19.5}, {{urn:schemas-microsoft-com:xml-diffgram-v1}id=d60428e5-9dbc-49c0-88e3-25f3a898746d126, {urn:schemas-microsoft-com:xml-msdata}rowOrder=125, {urn:schemas-microsoft-com:xml-diffgram-v1}hasChanges=inserted, ResidueWt=2750, CN2=70.75, Cona=8.7, U=5.4, OC=1.625, ResidueCNR=52, SWCon=0.38, DiffusConst=40, DiffusSlope=19.5}, {{urn:schemas-microsoft-com:xml-diffgram-v1}id=d60428e5-9dbc-49c0-88e3-25f3a898746d127, {urn:schemas-microsoft-com:xml-msdata}rowOrder=126, {urn:schemas-microsoft-com:xml-diffgram-v1}hasChanges=inserted, ResidueWt=2750, CN2=70.75, Cona=8.7, U=1.4, OC=1.625, ResidueCNR=52, SWCon=0.38, DiffusConst=40, DiffusSlope=19.5}, {{urn:schemas-microsoft-com:xml-diffgram-v1}id=d60428e5-9dbc-49c0-88e3-25f3a898746d128, {urn:schemas-microsoft-com:xml-msdata}rowOrder=127, {urn:schemas-microsoft-com:xml-diffgram-v1}hasChanges=inserted, ResidueWt=2750, CN2=70.75, Cona=5.7, U=1.4, OC=1.625, ResidueCNR=52, SWCon=0.38, DiffusConst=40, DiffusSlope=19.5}, {{urn:schemas-microsoft-com:xml-diffgram-v1}id=d60428e5-9dbc-49c0-88e3-25f3a898746d129, {urn:schemas-microsoft-com:xml-msdata}rowOrder=128, {urn:schemas-microsoft-com:xml-diffgram-v1}hasChanges=inserted, ResidueWt=2750, CN2=70.75, Cona=5.7, U=1.4, OC=0.875, ResidueCNR=52, SWCon=0.38, DiffusConst=40, DiffusSlope=19.5}, {{urn:schemas-microsoft-com:xml-diffgram-v1}id=d60428e5-9dbc-49c0-88e3-25f3a898746d130, {urn:schemas-microsoft-com:xml-msdata}rowOrder=129, {urn:schemas-microsoft-com:xml-diffgram-v1}hasChanges=inserted, ResidueWt=250, CN2=70.75, Cona=5.7, U=1.4, OC=0.875, ResidueCNR=52, SWCon=0.38, DiffusConst=40, DiffusSlope=19.5}, {{urn:schemas-microsoft-com:xml-diffgram-v1}id=d60428e5-9dbc-49c0-88e3-25f3a898746d131, {urn:schemas-microsoft-com:xml-msdata}rowOrder=130, {urn:schemas-microsoft-com:xml-diffgram-v1}hasChanges=inserted, ResidueWt=5000, CN2=73.75, Cona=4.2, U=8.2, OC=0.725, ResidueCNR=112, SWCon=0.3, DiffusConst=42, DiffusSlope=11.5}, {{urn:schemas-microsoft-com:xml-diffgram-v1}id=d60428e5-9dbc-49c0-88e3-25f3a898746d132, {urn:schemas-microsoft-com:xml-msdata}rowOrder=131, {urn:schemas-microsoft-com:xml-diffgram-v1}hasChanges=inserted, ResidueWt=5000, CN2=81.25, Cona=4.2, U=8.2, OC=0.725, ResidueCNR=112, SWCon=0.3, DiffusConst=42, DiffusSlope=11.5}, {{urn:schemas-microsoft-com:xml-diffgram-v1}id=d60428e5-9dbc-49c0-88e3-25f3a898746d133, {urn:schemas-microsoft-com:xml-msdata}rowOrder=132, {urn:schemas-microsoft-com:xml-diffgram-v1}hasChanges=inserted, ResidueWt=5000, CN2=81.25, Cona=4.2, U=8.2, OC=0.725, ResidueCNR=112, SWCon=0.3, DiffusConst=42, DiffusSlope=16.5}, {{urn:schemas-microsoft-com:xml-diffgram-v1}id=d60428e5-9dbc-49c0-88e3-25f3a898746d134, {urn:schemas-microsoft-com:xml-msdata}rowOrder=133, {urn:schemas-microsoft-com:xml-diffgram-v1}hasChanges=inserted, ResidueWt=5000, CN2=81.25, Cona=4.2, U=8.2, OC=0.725, ResidueCNR=112, SWCon=0.3, DiffusConst=22, DiffusSlope=16.5}, {{urn:schemas-microsoft-com:xml-diffgram-v1}id=d60428e5-9dbc-49c0-88e3-25f3a898746d135, {urn:schemas-microsoft-com:xml-msdata}rowOrder=134, {urn:schemas-microsoft-com:xml-diffgram-v1}hasChanges=inserted, ResidueWt=5000, CN2=81.25, Cona=4.2, U=8.2, OC=1.475, ResidueCNR=112, SWCon=0.3, DiffusConst=22, DiffusSlope=16.5}, {{urn:schemas-microsoft-com:xml-diffgram-v1}id=d60428e5-9dbc-49c0-88e3-25f3a898746d136, {urn:schemas-microsoft-com:xml-msdata}rowOrder=135, {urn:schemas-microsoft-com:xml-diffgram-v1}hasChanges=inserted, ResidueWt=5000, CN2=81.25, Cona=4.2, U=8.2, OC=1.475, ResidueCNR=112, SWCon=0.1, DiffusConst=22, DiffusSlope=16.5}, {{urn:schemas-microsoft-com:xml-diffgram-v1}id=d60428e5-9dbc-49c0-88e3-25f3a898746d137, {urn:schemas-microsoft-com:xml-msdata}rowOrder=136, {urn:schemas-microsoft-com:xml-diffgram-v1}hasChanges=inserted, ResidueWt=5000, CN2=81.25, Cona=4.2, U=4.2, OC=1.475, ResidueCNR=112, SWCon=0.1, DiffusConst=22, DiffusSlope=16.5}, {{urn:schemas-microsoft-com:xml-diffgram-v1}id=d60428e5-9dbc-49c0-88e3-25f3a898746d138, {urn:schemas-microsoft-com:xml-msdata}rowOrder=137, {urn:schemas-microsoft-com:xml-diffgram-v1}hasChanges=inserted, ResidueWt=5000, CN2=81.25, Cona=4.2, U=4.2, OC=1.475, ResidueCNR=72, SWCon=0.1, DiffusConst=22, DiffusSlope=16.5}, {{urn:schemas-microsoft-com:xml-diffgram-v1}id=d60428e5-9dbc-49c0-88e3-25f3a898746d139, {urn:schemas-microsoft-com:xml-msdata}rowOrder=138, {urn:schemas-microsoft-com:xml-diffgram-v1}hasChanges=inserted, ResidueWt=5000, CN2=81.25, Cona=7.2, U=4.2, OC=1.475, ResidueCNR=72, SWCon=0.1, DiffusConst=22, DiffusSlope=16.5}, {{urn:schemas-microsoft-com:xml-diffgram-v1}id=d60428e5-9dbc-49c0-88e3-25f3a898746d140, {urn:schemas-microsoft-com:xml-msdata}rowOrder=139, {urn:schemas-microsoft-com:xml-diffgram-v1}hasChanges=inserted, ResidueWt=2500, CN2=81.25, Cona=7.2, U=4.2, OC=1.475, ResidueCNR=72, SWCon=0.1, DiffusConst=22, DiffusSlope=16.5}, {{urn:schemas-microsoft-com:xml-diffgram-v1}id=d60428e5-9dbc-49c0-88e3-25f3a898746d141, {urn:schemas-microsoft-com:xml-msdata}rowOrder=140, {urn:schemas-microsoft-com:xml-diffgram-v1}hasChanges=inserted, ResidueWt=3500, CN2=73.75, Cona=9, U=6.2, OC=1.475, ResidueCNR=64, SWCon=0.32, DiffusConst=20, DiffusSlope=11}, {{urn:schemas-microsoft-com:xml-diffgram-v1}id=d60428e5-9dbc-49c0-88e3-25f3a898746d142, {urn:schemas-microsoft-com:xml-msdata}rowOrder=141, {urn:schemas-microsoft-com:xml-diffgram-v1}hasChanges=inserted, ResidueWt=3500, CN2=73.75, Cona=9, U=6.2, OC=1.475, ResidueCNR=64, SWCon=0.32, DiffusConst=20, DiffusSlope=16}, {{urn:schemas-microsoft-com:xml-diffgram-v1}id=d60428e5-9dbc-49c0-88e3-25f3a898746d143, {urn:schemas-microsoft-com:xml-msdata}rowOrder=142, {urn:schemas-microsoft-com:xml-diffgram-v1}hasChanges=inserted, ResidueWt=3500, CN2=81.25, Cona=9, U=6.2, OC=1.475, ResidueCNR=64, SWCon=0.32, DiffusConst=20, DiffusSlope=16}, {{urn:schemas-microsoft-com:xml-diffgram-v1}id=d60428e5-9dbc-49c0-88e3-25f3a898746d144, {urn:schemas-microsoft-com:xml-msdata}rowOrder=143, {urn:schemas-microsoft-com:xml-diffgram-v1}hasChanges=inserted, ResidueWt=3500, CN2=81.25, Cona=9, U=6.2, OC=1.475, ResidueCNR=104, SWCon=0.32, DiffusConst=20, DiffusSlope=16}, {{urn:schemas-microsoft-com:xml-diffgram-v1}id=d60428e5-9dbc-49c0-88e3-25f3a898746d145, {urn:schemas-microsoft-com:xml-msdata}rowOrder=144, {urn:schemas-microsoft-com:xml-diffgram-v1}hasChanges=inserted, ResidueWt=1000, CN2=81.25, Cona=9, U=6.2, OC=1.475, ResidueCNR=104, SWCon=0.32, DiffusConst=20, DiffusSlope=16}, {{urn:schemas-microsoft-com:xml-diffgram-v1}id=d60428e5-9dbc-49c0-88e3-25f3a898746d146, {urn:schemas-microsoft-com:xml-msdata}rowOrder=145, {urn:schemas-microsoft-com:xml-diffgram-v1}hasChanges=inserted, ResidueWt=1000, CN2=81.25, Cona=9, U=6.2, OC=0.725, ResidueCNR=104, SWCon=0.32, DiffusConst=20, DiffusSlope=16}, {{urn:schemas-microsoft-com:xml-diffgram-v1}id=d60428e5-9dbc-49c0-88e3-25f3a898746d147, {urn:schemas-microsoft-com:xml-msdata}rowOrder=146, {urn:schemas-microsoft-com:xml-diffgram-v1}hasChanges=inserted, ResidueWt=1000, CN2=81.25, Cona=9, U=2.2, OC=0.725, ResidueCNR=104, SWCon=0.32, DiffusConst=20, DiffusSlope=16}, {{urn:schemas-microsoft-com:xml-diffgram-v1}id=d60428e5-9dbc-49c0-88e3-25f3a898746d148, {urn:schemas-microsoft-com:xml-msdata}rowOrder=147, {urn:schemas-microsoft-com:xml-diffgram-v1}hasChanges=inserted, ResidueWt=1000, CN2=81.25, Cona=9, U=2.2, OC=0.725, ResidueCNR=104, SWCon=0.32, DiffusConst=40, DiffusSlope=16}, {{urn:schemas-microsoft-com:xml-diffgram-v1}id=d60428e5-9dbc-49c0-88e3-25f3a898746d149, {urn:schemas-microsoft-com:xml-msdata}rowOrder=148, {urn:schemas-microsoft-com:xml-diffgram-v1}hasChanges=inserted, ResidueWt=1000, CN2=81.25, Cona=9, U=2.2, OC=0.725, ResidueCNR=104, SWCon=0.12, DiffusConst=40, DiffusSlope=16}, {{urn:schemas-microsoft-com:xml-diffgram-v1}id=d60428e5-9dbc-49c0-88e3-25f3a898746d150, {urn:schemas-microsoft-com:xml-msdata}rowOrder=149, {urn:schemas-microsoft-com:xml-diffgram-v1}hasChanges=inserted, ResidueWt=1000, CN2=81.25, Cona=6, U=2.2, OC=0.725, ResidueCNR=104, SWCon=0.12, DiffusConst=40, DiffusSlope=16}, {{urn:schemas-microsoft-com:xml-diffgram-v1}id=d60428e5-9dbc-49c0-88e3-25f3a898746d151, {urn:schemas-microsoft-com:xml-msdata}rowOrder=150, {urn:schemas-microsoft-com:xml-diffgram-v1}hasChanges=inserted, ResidueWt=1250, CN2=70, Cona=3, U=3, OC=0.875, ResidueCNR=100, SWCon=0.28, DiffusConst=58, DiffusSlope=14.5}, {{urn:schemas-microsoft-com:xml-diffgram-v1}id=d60428e5-9dbc-49c0-88e3-25f3a898746d152, {urn:schemas-microsoft-com:xml-msdata}rowOrder=151, {urn:schemas-microsoft-com:xml-diffgram-v1}hasChanges=inserted, ResidueWt=1250, CN2=70, Cona=3, U=7, OC=0.875, ResidueCNR=100, SWCon=0.28, DiffusConst=58, DiffusSlope=14.5}, {{urn:schemas-microsoft-com:xml-diffgram-v1}id=d60428e5-9dbc-49c0-88e3-25f3a898746d153, {urn:schemas-microsoft-com:xml-msdata}rowOrder=152, {urn:schemas-microsoft-com:xml-diffgram-v1}hasChanges=inserted, ResidueWt=1250, CN2=70, Cona=3, U=7, OC=0.875, ResidueCNR=100, SWCon=0.48, DiffusConst=58, DiffusSlope=14.5}, {{urn:schemas-microsoft-com:xml-diffgram-v1}id=d60428e5-9dbc-49c0-88e3-25f3a898746d154, {urn:schemas-microsoft-com:xml-msdata}rowOrder=153, {urn:schemas-microsoft-com:xml-diffgram-v1}hasChanges=inserted, ResidueWt=3750, CN2=70, Cona=3, U=7, OC=0.875, ResidueCNR=100, SWCon=0.48, DiffusConst=58, DiffusSlope=14.5}, {{urn:schemas-microsoft-com:xml-diffgram-v1}id=d60428e5-9dbc-49c0-88e3-25f3a898746d155, {urn:schemas-microsoft-com:xml-msdata}rowOrder=154, {urn:schemas-microsoft-com:xml-diffgram-v1}hasChanges=inserted, ResidueWt=3750, CN2=77.5, Cona=3, U=7, OC=0.875, ResidueCNR=100, SWCon=0.48, DiffusConst=58, DiffusSlope=14.5}, {{urn:schemas-microsoft-com:xml-diffgram-v1}id=d60428e5-9dbc-49c0-88e3-25f3a898746d156, {urn:schemas-microsoft-com:xml-msdata}rowOrder=155, {urn:schemas-microsoft-com:xml-diffgram-v1}hasChanges=inserted, ResidueWt=3750, CN2=77.5, Cona=3, U=7, OC=0.875, ResidueCNR=60, SWCon=0.48, DiffusConst=58, DiffusSlope=14.5}, {{urn:schemas-microsoft-com:xml-diffgram-v1}id=d60428e5-9dbc-49c0-88e3-25f3a898746d157, {urn:schemas-microsoft-com:xml-msdata}rowOrder=156, {urn:schemas-microsoft-com:xml-diffgram-v1}hasChanges=inserted, ResidueWt=3750, CN2=77.5, Cona=6, U=7, OC=0.875, ResidueCNR=60, SWCon=0.48, DiffusConst=58, DiffusSlope=14.5}, {{urn:schemas-microsoft-com:xml-diffgram-v1}id=d60428e5-9dbc-49c0-88e3-25f3a898746d158, {urn:schemas-microsoft-com:xml-msdata}rowOrder=157, {urn:schemas-microsoft-com:xml-diffgram-v1}hasChanges=inserted, ResidueWt=3750, CN2=77.5, Cona=6, U=7, OC=1.625, ResidueCNR=60, SWCon=0.48, DiffusConst=58, DiffusSlope=14.5}, {{urn:schemas-microsoft-com:xml-diffgram-v1}id=d60428e5-9dbc-49c0-88e3-25f3a898746d159, {urn:schemas-microsoft-com:xml-msdata}rowOrder=158, {urn:schemas-microsoft-com:xml-diffgram-v1}hasChanges=inserted, ResidueWt=3750, CN2=77.5, Cona=6, U=7, OC=1.625, ResidueCNR=60, SWCon=0.48, DiffusConst=58, DiffusSlope=19.5}, {{urn:schemas-microsoft-com:xml-diffgram-v1}id=d60428e5-9dbc-49c0-88e3-25f3a898746d160, {urn:schemas-microsoft-com:xml-msdata}rowOrder=159, {urn:schemas-microsoft-com:xml-diffgram-v1}hasChanges=inserted, ResidueWt=3750, CN2=77.5, Cona=6, U=7, OC=1.625, ResidueCNR=60, SWCon=0.48, DiffusConst=38, DiffusSlope=19.5}, {{urn:schemas-microsoft-com:xml-diffgram-v1}id=d60428e5-9dbc-49c0-88e3-25f3a898746d161, {urn:schemas-microsoft-com:xml-msdata}rowOrder=160, {urn:schemas-microsoft-com:xml-diffgram-v1}hasChanges=inserted, ResidueWt=750, CN2=77.5, Cona=5.1, U=3.4, OC=0.5, ResidueCNR=108, SWCon=0.12, DiffusConst=48, DiffusSlope=16.5}, {{urn:schemas-microsoft-com:xml-diffgram-v1}id=d60428e5-9dbc-49c0-88e3-25f3a898746d162, {urn:schemas-microsoft-com:xml-msdata}rowOrder=161, {urn:schemas-microsoft-com:xml-diffgram-v1}hasChanges=inserted, ResidueWt=750, CN2=77.5, Cona=5.1, U=3.4, OC=1.25, ResidueCNR=108, SWCon=0.12, DiffusConst=48, DiffusSlope=16.5}, {{urn:schemas-microsoft-com:xml-diffgram-v1}id=d60428e5-9dbc-49c0-88e3-25f3a898746d163, {urn:schemas-microsoft-com:xml-msdata}rowOrder=162, {urn:schemas-microsoft-com:xml-diffgram-v1}hasChanges=inserted, ResidueWt=3250, CN2=77.5, Cona=5.1, U=3.4, OC=1.25, ResidueCNR=108, SWCon=0.12, DiffusConst=48, DiffusSlope=16.5}, {{urn:schemas-microsoft-com:xml-diffgram-v1}id=d60428e5-9dbc-49c0-88e3-25f3a898746d164, {urn:schemas-microsoft-com:xml-msdata}rowOrder=163, {urn:schemas-microsoft-com:xml-diffgram-v1}hasChanges=inserted, ResidueWt=3250, CN2=77.5, Cona=5.1, U=3.4, OC=1.25, ResidueCNR=68, SWCon=0.12, DiffusConst=48, DiffusSlope=16.5}, {{urn:schemas-microsoft-com:xml-diffgram-v1}id=d60428e5-9dbc-49c0-88e3-25f3a898746d165, {urn:schemas-microsoft-com:xml-msdata}rowOrder=164, {urn:schemas-microsoft-com:xml-diffgram-v1}hasChanges=inserted, ResidueWt=3250, CN2=77.5, Cona=5.1, U=3.4, OC=1.25, ResidueCNR=68, SWCon=0.12, DiffusConst=48, DiffusSlope=11.5}, {{urn:schemas-microsoft-com:xml-diffgram-v1}id=d60428e5-9dbc-49c0-88e3-25f3a898746d166, {urn:schemas-microsoft-com:xml-msdata}rowOrder=165, {urn:schemas-microsoft-com:xml-diffgram-v1}hasChanges=inserted, ResidueWt=3250, CN2=77.5, Cona=8.1, U=3.4, OC=1.25, ResidueCNR=68, SWCon=0.12, DiffusConst=48, DiffusSlope=11.5}, {{urn:schemas-microsoft-com:xml-diffgram-v1}id=d60428e5-9dbc-49c0-88e3-25f3a898746d167, {urn:schemas-microsoft-com:xml-msdata}rowOrder=166, {urn:schemas-microsoft-com:xml-diffgram-v1}hasChanges=inserted, ResidueWt=3250, CN2=85, Cona=8.1, U=3.4, OC=1.25, ResidueCNR=68, SWCon=0.12, DiffusConst=48, DiffusSlope=11.5}, {{urn:schemas-microsoft-com:xml-diffgram-v1}id=d60428e5-9dbc-49c0-88e3-25f3a898746d168, {urn:schemas-microsoft-com:xml-msdata}rowOrder=167, {urn:schemas-microsoft-com:xml-diffgram-v1}hasChanges=inserted, ResidueWt=3250, CN2=85, Cona=8.1, U=3.4, OC=1.25, ResidueCNR=68, SWCon=0.12, DiffusConst=28, DiffusSlope=11.5}, {{urn:schemas-microsoft-com:xml-diffgram-v1}id=d60428e5-9dbc-49c0-88e3-25f3a898746d169, {urn:schemas-microsoft-com:xml-msdata}rowOrder=168, {urn:schemas-microsoft-com:xml-diffgram-v1}hasChanges=inserted, ResidueWt=3250, CN2=85, Cona=8.1, U=3.4, OC=1.25, ResidueCNR=68, SWCon=0.32, DiffusConst=28, DiffusSlope=11.5}, {{urn:schemas-microsoft-com:xml-diffgram-v1}id=d60428e5-9dbc-49c0-88e3-25f3a898746d170, {urn:schemas-microsoft-com:xml-msdata}rowOrder=169, {urn:schemas-microsoft-com:xml-diffgram-v1}hasChanges=inserted, ResidueWt=3250, CN2=85, Cona=8.1, U=7.4, OC=1.25, ResidueCNR=68, SWCon=0.32, DiffusConst=28, DiffusSlope=11.5}, {{urn:schemas-microsoft-com:xml-diffgram-v1}id=d60428e5-9dbc-49c0-88e3-25f3a898746d171, {urn:schemas-microsoft-com:xml-msdata}rowOrder=170, {urn:schemas-microsoft-com:xml-diffgram-v1}hasChanges=inserted, ResidueWt=4000, CN2=76.75, Cona=9, U=5.4, OC=0.5, ResidueCNR=116, SWCon=0.24, DiffusConst=24, DiffusSlope=19}, {{urn:schemas-microsoft-com:xml-diffgram-v1}id=d60428e5-9dbc-49c0-88e3-25f3a898746d172, {urn:schemas-microsoft-com:xml-msdata}rowOrder=171, {urn:schemas-microsoft-com:xml-diffgram-v1}hasChanges=inserted, ResidueWt=1500, CN2=76.75, Cona=9, U=5.4, OC=0.5, ResidueCNR=116, SWCon=0.24, DiffusConst=24, DiffusSlope=19}, {{urn:schemas-microsoft-com:xml-diffgram-v1}id=d60428e5-9dbc-49c0-88e3-25f3a898746d173, {urn:schemas-microsoft-com:xml-msdata}rowOrder=172, {urn:schemas-microsoft-com:xml-diffgram-v1}hasChanges=inserted, ResidueWt=1500, CN2=84.25, Cona=9, U=5.4, OC=0.5, ResidueCNR=116, SWCon=0.24, DiffusConst=24, DiffusSlope=19}, {{urn:schemas-microsoft-com:xml-diffgram-v1}id=d60428e5-9dbc-49c0-88e3-25f3a898746d174, {urn:schemas-microsoft-com:xml-msdata}rowOrder=173, {urn:schemas-microsoft-com:xml-diffgram-v1}hasChanges=inserted, ResidueWt=1500, CN2=84.25, Cona=9, U=5.4, OC=0.5, ResidueCNR=116, SWCon=0.24, DiffusConst=24, DiffusSlope=14}, {{urn:schemas-microsoft-com:xml-diffgram-v1}id=d60428e5-9dbc-49c0-88e3-25f3a898746d175, {urn:schemas-microsoft-com:xml-msdata}rowOrder=174, {urn:schemas-microsoft-com:xml-diffgram-v1}hasChanges=inserted, ResidueWt=1500, CN2=84.25, Cona=9, U=5.4, OC=0.5, ResidueCNR=116, SWCon=0.24, DiffusConst=44, DiffusSlope=14}, {{urn:schemas-microsoft-com:xml-diffgram-v1}id=d60428e5-9dbc-49c0-88e3-25f3a898746d176, {urn:schemas-microsoft-com:xml-msdata}rowOrder=175, {urn:schemas-microsoft-com:xml-diffgram-v1}hasChanges=inserted, ResidueWt=1500, CN2=84.25, Cona=9, U=1.4, OC=0.5, ResidueCNR=116, SWCon=0.24, DiffusConst=44, DiffusSlope=14}, {{urn:schemas-microsoft-com:xml-diffgram-v1}id=d60428e5-9dbc-49c0-88e3-25f3a898746d177, {urn:schemas-microsoft-com:xml-msdata}rowOrder=176, {urn:schemas-microsoft-com:xml-diffgram-v1}hasChanges=inserted, ResidueWt=1500, CN2=84.25, Cona=6, U=1.4, OC=0.5, ResidueCNR=116, SWCon=0.24, DiffusConst=44, DiffusSlope=14}, {{urn:schemas-microsoft-com:xml-diffgram-v1}id=d60428e5-9dbc-49c0-88e3-25f3a898746d178, {urn:schemas-microsoft-com:xml-msdata}rowOrder=177, {urn:schemas-microsoft-com:xml-diffgram-v1}hasChanges=inserted, ResidueWt=1500, CN2=84.25, Cona=6, U=1.4, OC=0.5, ResidueCNR=116, SWCon=0.44, DiffusConst=44, DiffusSlope=14}, {{urn:schemas-microsoft-com:xml-diffgram-v1}id=d60428e5-9dbc-49c0-88e3-25f3a898746d179, {urn:schemas-microsoft-com:xml-msdata}rowOrder=178, {urn:schemas-microsoft-com:xml-diffgram-v1}hasChanges=inserted, ResidueWt=1500, CN2=84.25, Cona=6, U=1.4, OC=1.25, ResidueCNR=116, SWCon=0.44, DiffusConst=44, DiffusSlope=14}, {{urn:schemas-microsoft-com:xml-diffgram-v1}id=d60428e5-9dbc-49c0-88e3-25f3a898746d180, {urn:schemas-microsoft-com:xml-msdata}rowOrder=179, {urn:schemas-microsoft-com:xml-diffgram-v1}hasChanges=inserted, ResidueWt=1500, CN2=84.25, Cona=6, U=1.4, OC=1.25, ResidueCNR=76, SWCon=0.44, DiffusConst=44, DiffusSlope=14}, {{urn:schemas-microsoft-com:xml-diffgram-v1}id=d60428e5-9dbc-49c0-88e3-25f3a898746d181, {urn:schemas-microsoft-com:xml-msdata}rowOrder=180, {urn:schemas-microsoft-com:xml-diffgram-v1}hasChanges=inserted, ResidueWt=3500, CN2=70.75, Cona=6.9, U=5.4, OC=0.8, ResidueCNR=72, SWCon=0.3, DiffusConst=24, DiffusSlope=16.5}, {{urn:schemas-microsoft-com:xml-diffgram-v1}id=d60428e5-9dbc-49c0-88e3-25f3a898746d182, {urn:schemas-microsoft-com:xml-msdata}rowOrder=181, {urn:schemas-microsoft-com:xml-diffgram-v1}hasChanges=inserted, ResidueWt=3500, CN2=70.75, Cona=6.9, U=5.4, OC=0.8, ResidueCNR=112, SWCon=0.3, DiffusConst=24, DiffusSlope=16.5}, {{urn:schemas-microsoft-com:xml-diffgram-v1}id=d60428e5-9dbc-49c0-88e3-25f3a898746d183, {urn:schemas-microsoft-com:xml-msdata}rowOrder=182, {urn:schemas-microsoft-com:xml-diffgram-v1}hasChanges=inserted, ResidueWt=1000, CN2=70.75, Cona=6.9, U=5.4, OC=0.8, ResidueCNR=112, SWCon=0.3, DiffusConst=24, DiffusSlope=16.5}, {{urn:schemas-microsoft-com:xml-diffgram-v1}id=d60428e5-9dbc-49c0-88e3-25f3a898746d184, {urn:schemas-microsoft-com:xml-msdata}rowOrder=183, {urn:schemas-microsoft-com:xml-diffgram-v1}hasChanges=inserted, ResidueWt=1000, CN2=70.75, Cona=6.9, U=5.4, OC=0.8, ResidueCNR=112, SWCon=0.3, DiffusConst=24, DiffusSlope=11.5}, {{urn:schemas-microsoft-com:xml-diffgram-v1}id=d60428e5-9dbc-49c0-88e3-25f3a898746d185, {urn:schemas-microsoft-com:xml-msdata}rowOrder=184, {urn:schemas-microsoft-com:xml-diffgram-v1}hasChanges=inserted, ResidueWt=1000, CN2=78.25, Cona=6.9, U=5.4, OC=0.8, ResidueCNR=112, SWCon=0.3, DiffusConst=24, DiffusSlope=11.5}, {{urn:schemas-microsoft-com:xml-diffgram-v1}id=d60428e5-9dbc-49c0-88e3-25f3a898746d186, {urn:schemas-microsoft-com:xml-msdata}rowOrder=185, {urn:schemas-microsoft-com:xml-diffgram-v1}hasChanges=inserted, ResidueWt=1000, CN2=78.25, Cona=6.9, U=5.4, OC=1.55, ResidueCNR=112, SWCon=0.3, DiffusConst=24, DiffusSlope=11.5}, {{urn:schemas-microsoft-com:xml-diffgram-v1}id=d60428e5-9dbc-49c0-88e3-25f3a898746d187, {urn:schemas-microsoft-com:xml-msdata}rowOrder=186, {urn:schemas-microsoft-com:xml-diffgram-v1}hasChanges=inserted, ResidueWt=1000, CN2=78.25, Cona=6.9, U=1.4, OC=1.55, ResidueCNR=112, SWCon=0.3, DiffusConst=24, DiffusSlope=11.5}, {{urn:schemas-microsoft-com:xml-diffgram-v1}id=d60428e5-9dbc-49c0-88e3-25f3a898746d188, {urn:schemas-microsoft-com:xml-msdata}rowOrder=187, {urn:schemas-microsoft-com:xml-diffgram-v1}hasChanges=inserted, ResidueWt=1000, CN2=78.25, Cona=6.9, U=1.4, OC=1.55, ResidueCNR=112, SWCon=0.1, DiffusConst=24, DiffusSlope=11.5}, {{urn:schemas-microsoft-com:xml-diffgram-v1}id=d60428e5-9dbc-49c0-88e3-25f3a898746d189, {urn:schemas-microsoft-com:xml-msdata}rowOrder=188, {urn:schemas-microsoft-com:xml-diffgram-v1}hasChanges=inserted, ResidueWt=1000, CN2=78.25, Cona=3.9, U=1.4, OC=1.55, ResidueCNR=112, SWCon=0.1, DiffusConst=24, DiffusSlope=11.5}, {{urn:schemas-microsoft-com:xml-diffgram-v1}id=d60428e5-9dbc-49c0-88e3-25f3a898746d190, {urn:schemas-microsoft-com:xml-msdata}rowOrder=189, {urn:schemas-microsoft-com:xml-diffgram-v1}hasChanges=inserted, ResidueWt=1000, CN2=78.25, Cona=3.9, U=1.4, OC=1.55, ResidueCNR=112, SWCon=0.1, DiffusConst=44, DiffusSlope=11.5}, {{urn:schemas-microsoft-com:xml-diffgram-v1}id=d60428e5-9dbc-49c0-88e3-25f3a898746d191, {urn:schemas-microsoft-com:xml-msdata}rowOrder=190, {urn:schemas-microsoft-com:xml-diffgram-v1}hasChanges=inserted, ResidueWt=500, CN2=70, Cona=4.5, U=7.8, OC=0.8, ResidueCNR=40, SWCon=0.4, DiffusConst=52, DiffusSlope=17}, {{urn:schemas-microsoft-com:xml-diffgram-v1}id=d60428e5-9dbc-49c0-88e3-25f3a898746d192, {urn:schemas-microsoft-com:xml-msdata}rowOrder=191, {urn:schemas-microsoft-com:xml-diffgram-v1}hasChanges=inserted, ResidueWt=3000, CN2=70, Cona=4.5, U=7.8, OC=0.8, ResidueCNR=40, SWCon=0.4, DiffusConst=52, DiffusSlope=17}, {{urn:schemas-microsoft-com:xml-diffgram-v1}id=d60428e5-9dbc-49c0-88e3-25f3a898746d193, {urn:schemas-microsoft-com:xml-msdata}rowOrder=192, {urn:schemas-microsoft-com:xml-diffgram-v1}hasChanges=inserted, ResidueWt=3000, CN2=70, Cona=4.5, U=7.8, OC=0.8, ResidueCNR=40, SWCon=0.2, DiffusConst=52, DiffusSlope=17}, {{urn:schemas-microsoft-com:xml-diffgram-v1}id=d60428e5-9dbc-49c0-88e3-25f3a898746d194, {urn:schemas-microsoft-com:xml-msdata}rowOrder=193, {urn:schemas-microsoft-com:xml-diffgram-v1}hasChanges=inserted, ResidueWt=3000, CN2=70, Cona=4.5, U=7.8, OC=1.55, ResidueCNR=40, SWCon=0.2, DiffusConst=52, DiffusSlope=17}, {{urn:schemas-microsoft-com:xml-diffgram-v1}id=d60428e5-9dbc-49c0-88e3-25f3a898746d195, {urn:schemas-microsoft-com:xml-msdata}rowOrder=194, {urn:schemas-microsoft-com:xml-diffgram-v1}hasChanges=inserted, ResidueWt=3000, CN2=70, Cona=7.5, U=7.8, OC=1.55, ResidueCNR=40, SWCon=0.2, DiffusConst=52, DiffusSlope=17}, {{urn:schemas-microsoft-com:xml-diffgram-v1}id=d60428e5-9dbc-49c0-88e3-25f3a898746d196, {urn:schemas-microsoft-com:xml-msdata}rowOrder=195, {urn:schemas-microsoft-com:xml-diffgram-v1}hasChanges=inserted, ResidueWt=3000, CN2=70, Cona=7.5, U=3.8, OC=1.55, ResidueCNR=40, SWCon=0.2, DiffusConst=52, DiffusSlope=17}, {{urn:schemas-microsoft-com:xml-diffgram-v1}id=d60428e5-9dbc-49c0-88e3-25f3a898746d197, {urn:schemas-microsoft-com:xml-msdata}rowOrder=196, {urn:schemas-microsoft-com:xml-diffgram-v1}hasChanges=inserted, ResidueWt=3000, CN2=70, Cona=7.5, U=3.8, OC=1.55, ResidueCNR=80, SWCon=0.2, DiffusConst=52, DiffusSlope=17}, {{urn:schemas-microsoft-com:xml-diffgram-v1}id=d60428e5-9dbc-49c0-88e3-25f3a898746d198, {urn:schemas-microsoft-com:xml-msdata}rowOrder=197, {urn:schemas-microsoft-com:xml-diffgram-v1}hasChanges=inserted, ResidueWt=3000, CN2=77.5, Cona=7.5, U=3.8, OC=1.55, ResidueCNR=80, SWCon=0.2, DiffusConst=52, DiffusSlope=17}, {{urn:schemas-microsoft-com:xml-diffgram-v1}id=d60428e5-9dbc-49c0-88e3-25f3a898746d199, {urn:schemas-microsoft-com:xml-msdata}rowOrder=198, {urn:schemas-microsoft-com:xml-diffgram-v1}hasChanges=inserted, ResidueWt=3000, CN2=77.5, Cona=7.5, U=3.8, OC=1.55, ResidueCNR=80, SWCon=0.2, DiffusConst=32, DiffusSlope=17}, {{urn:schemas-microsoft-com:xml-diffgram-v1}id=d60428e5-9dbc-49c0-88e3-25f3a898746d200, {urn:schemas-microsoft-com:xml-msdata}rowOrder=199, {urn:schemas-microsoft-com:xml-diffgram-v1}hasChanges=inserted, ResidueWt=3000, CN2=77.5, Cona=7.5, U=3.8, OC=1.55, ResidueCNR=80, SWCon=0.2, DiffusConst=32, DiffusSlope=12}, {{urn:schemas-microsoft-com:xml-diffgram-v1}id=d60428e5-9dbc-49c0-88e3-25f3a898746d201, {urn:schemas-microsoft-com:xml-msdata}rowOrder=200, {urn:schemas-microsoft-com:xml-diffgram-v1}hasChanges=inserted, ResidueWt=1750, CN2=79, Cona=6, U=7, OC=0.5, ResidueCNR=60, SWCon=0.32, DiffusConst=44, DiffusSlope=16.5}, {{urn:schemas-microsoft-com:xml-diffgram-v1}id=d60428e5-9dbc-49c0-88e3-25f3a898746d202, {urn:schemas-microsoft-com:xml-msdata}rowOrder=201, {urn:schemas-microsoft-com:xml-diffgram-v1}hasChanges=inserted, ResidueWt=4250, CN2=79, Cona=6, U=7, OC=0.5, ResidueCNR=60, SWCon=0.32, DiffusConst=44, DiffusSlope=16.5}, {{urn:schemas-microsoft-com:xml-diffgram-v1}id=d60428e5-9dbc-49c0-88e3-25f3a898746d203, {urn:schemas-microsoft-com:xml-msdata}rowOrder=202, {urn:schemas-microsoft-com:xml-diffgram-v1}hasChanges=inserted, ResidueWt=4250, CN2=79, Cona=6, U=7, OC=0.5, ResidueCNR=60, SWCon=0.32, DiffusConst=24, DiffusSlope=16.5}, {{urn:schemas-microsoft-com:xml-diffgram-v1}id=d60428e5-9dbc-49c0-88e3-25f3a898746d204, {urn:schemas-microsoft-com:xml-msdata}rowOrder=203, {urn:schemas-microsoft-com:xml-diffgram-v1}hasChanges=inserted, ResidueWt=4250, CN2=79, Cona=6, U=7, OC=0.5, ResidueCNR=60, SWCon=0.12, DiffusConst=24, DiffusSlope=16.5}, {{urn:schemas-microsoft-com:xml-diffgram-v1}id=d60428e5-9dbc-49c0-88e3-25f3a898746d205, {urn:schemas-microsoft-com:xml-msdata}rowOrder=204, {urn:schemas-microsoft-com:xml-diffgram-v1}hasChanges=inserted, ResidueWt=4250, CN2=71.5, Cona=6, U=7, OC=0.5, ResidueCNR=60, SWCon=0.12, DiffusConst=24, DiffusSlope=16.5}, {{urn:schemas-microsoft-com:xml-diffgram-v1}id=d60428e5-9dbc-49c0-88e3-25f3a898746d206, {urn:schemas-microsoft-com:xml-msdata}rowOrder=205, {urn:schemas-microsoft-com:xml-diffgram-v1}hasChanges=inserted, ResidueWt=4250, CN2=71.5, Cona=6, U=7, OC=0.5, ResidueCNR=100, SWCon=0.12, DiffusConst=24, DiffusSlope=16.5}, {{urn:schemas-microsoft-com:xml-diffgram-v1}id=d60428e5-9dbc-49c0-88e3-25f3a898746d207, {urn:schemas-microsoft-com:xml-msdata}rowOrder=206, {urn:schemas-microsoft-com:xml-diffgram-v1}hasChanges=inserted, ResidueWt=4250, CN2=71.5, Cona=6, U=3, OC=0.5, ResidueCNR=100, SWCon=0.12, DiffusConst=24, DiffusSlope=16.5}, {{urn:schemas-microsoft-com:xml-diffgram-v1}id=d60428e5-9dbc-49c0-88e3-25f3a898746d208, {urn:schemas-microsoft-com:xml-msdata}rowOrder=207, {urn:schemas-microsoft-com:xml-diffgram-v1}hasChanges=inserted, ResidueWt=4250, CN2=71.5, Cona=6, U=3, OC=0.5, ResidueCNR=100, SWCon=0.12, DiffusConst=24, DiffusSlope=11.5}, {{urn:schemas-microsoft-com:xml-diffgram-v1}id=d60428e5-9dbc-49c0-88e3-25f3a898746d209, {urn:schemas-microsoft-com:xml-msdata}rowOrder=208, {urn:schemas-microsoft-com:xml-diffgram-v1}hasChanges=inserted, ResidueWt=4250, CN2=71.5, Cona=9, U=3, OC=0.5, ResidueCNR=100, SWCon=0.12, DiffusConst=24, DiffusSlope=11.5}, {{urn:schemas-microsoft-com:xml-diffgram-v1}id=d60428e5-9dbc-49c0-88e3-25f3a898746d210, {urn:schemas-microsoft-com:xml-msdata}rowOrder=209, {urn:schemas-microsoft-com:xml-diffgram-v1}hasChanges=inserted, ResidueWt=4250, CN2=71.5, Cona=9, U=3, OC=1.25, ResidueCNR=100, SWCon=0.12, DiffusConst=24, DiffusSlope=11.5}, {{urn:schemas-microsoft-com:xml-diffgram-v1}id=d60428e5-9dbc-49c0-88e3-25f3a898746d211, {urn:schemas-microsoft-com:xml-msdata}rowOrder=210, {urn:schemas-microsoft-com:xml-diffgram-v1}hasChanges=inserted, ResidueWt=1250, CN2=79, Cona=3, U=8.2, OC=1.775, ResidueCNR=76, SWCon=0.3, DiffusConst=54, DiffusSlope=18}, {{urn:schemas-microsoft-com:xml-diffgram-v1}id=d60428e5-9dbc-49c0-88e3-25f3a898746d212, {urn:schemas-microsoft-com:xml-msdata}rowOrder=211, {urn:schemas-microsoft-com:xml-diffgram-v1}hasChanges=inserted, ResidueWt=1250, CN2=79, Cona=3, U=8.2, OC=1.775, ResidueCNR=76, SWCon=0.3, DiffusConst=54, DiffusSlope=13}, {{urn:schemas-microsoft-com:xml-diffgram-v1}id=d60428e5-9dbc-49c0-88e3-25f3a898746d213, {urn:schemas-microsoft-com:xml-msdata}rowOrder=212, {urn:schemas-microsoft-com:xml-diffgram-v1}hasChanges=inserted, ResidueWt=1250, CN2=79, Cona=6, U=8.2, OC=1.775, ResidueCNR=76, SWCon=0.3, DiffusConst=54, DiffusSlope=13}, {{urn:schemas-microsoft-com:xml-diffgram-v1}id=d60428e5-9dbc-49c0-88e3-25f3a898746d214, {urn:schemas-microsoft-com:xml-msdata}rowOrder=213, {urn:schemas-microsoft-com:xml-diffgram-v1}hasChanges=inserted, ResidueWt=1250, CN2=79, Cona=6, U=8.2, OC=1.775, ResidueCNR=116, SWCon=0.3, DiffusConst=54, DiffusSlope=13}, {{urn:schemas-microsoft-com:xml-diffgram-v1}id=d60428e5-9dbc-49c0-88e3-25f3a898746d215, {urn:schemas-microsoft-com:xml-msdata}rowOrder=214, {urn:schemas-microsoft-com:xml-diffgram-v1}hasChanges=inserted, ResidueWt=3750, CN2=79, Cona=6, U=8.2, OC=1.775, ResidueCNR=116, SWCon=0.3, DiffusConst=54, DiffusSlope=13}, {{urn:schemas-microsoft-com:xml-diffgram-v1}id=d60428e5-9dbc-49c0-88e3-25f3a898746d216, {urn:schemas-microsoft-com:xml-msdata}rowOrder=215, {urn:schemas-microsoft-com:xml-diffgram-v1}hasChanges=inserted, ResidueWt=3750, CN2=79, Cona=6, U=8.2, OC=1.025, ResidueCNR=116, SWCon=0.3, DiffusConst=54, DiffusSlope=13}, {{urn:schemas-microsoft-com:xml-diffgram-v1}id=d60428e5-9dbc-49c0-88e3-25f3a898746d217, {urn:schemas-microsoft-com:xml-msdata}rowOrder=216, {urn:schemas-microsoft-com:xml-diffgram-v1}hasChanges=inserted, ResidueWt=3750, CN2=79, Cona=6, U=8.2, OC=1.025, ResidueCNR=116, SWCon=0.5, DiffusConst=54, DiffusSlope=13}, {{urn:schemas-microsoft-com:xml-diffgram-v1}id=d60428e5-9dbc-49c0-88e3-25f3a898746d218, {urn:schemas-microsoft-com:xml-msdata}rowOrder=217, {urn:schemas-microsoft-com:xml-diffgram-v1}hasChanges=inserted, ResidueWt=3750, CN2=79, Cona=6, U=8.2, OC=1.025, ResidueCNR=116, SWCon=0.5, DiffusConst=34, DiffusSlope=13}, {{urn:schemas-microsoft-com:xml-diffgram-v1}id=d60428e5-9dbc-49c0-88e3-25f3a898746d219, {urn:schemas-microsoft-com:xml-msdata}rowOrder=218, {urn:schemas-microsoft-com:xml-diffgram-v1}hasChanges=inserted, ResidueWt=3750, CN2=79, Cona=6, U=4.2, OC=1.025, ResidueCNR=116, SWCon=0.5, DiffusConst=34, DiffusSlope=13}, {{urn:schemas-microsoft-com:xml-diffgram-v1}id=d60428e5-9dbc-49c0-88e3-25f3a898746d220, {urn:schemas-microsoft-com:xml-msdata}rowOrder=219, {urn:schemas-microsoft-com:xml-diffgram-v1}hasChanges=inserted, ResidueWt=3750, CN2=71.5, Cona=6, U=4.2, OC=1.025, ResidueCNR=116, SWCon=0.5, DiffusConst=34, DiffusSlope=13}, {{urn:schemas-microsoft-com:xml-diffgram-v1}id=d60428e5-9dbc-49c0-88e3-25f3a898746d221, {urn:schemas-microsoft-com:xml-msdata}rowOrder=220, {urn:schemas-microsoft-com:xml-diffgram-v1}hasChanges=inserted, ResidueWt=4250, CN2=70.75, Cona=8.7, U=8.2, OC=0.95, ResidueCNR=80, SWCon=0.44, DiffusConst=46, DiffusSlope=16}, {{urn:schemas-microsoft-com:xml-diffgram-v1}id=d60428e5-9dbc-49c0-88e3-25f3a898746d222, {urn:schemas-microsoft-com:xml-msdata}rowOrder=221, {urn:schemas-microsoft-com:xml-diffgram-v1}hasChanges=inserted, ResidueWt=4250, CN2=70.75, Cona=8.7, U=8.2, OC=0.95, ResidueCNR=40, SWCon=0.44, DiffusConst=46, DiffusSlope=16}, {{urn:schemas-microsoft-com:xml-diffgram-v1}id=d60428e5-9dbc-49c0-88e3-25f3a898746d223, {urn:schemas-microsoft-com:xml-msdata}rowOrder=222, {urn:schemas-microsoft-com:xml-diffgram-v1}hasChanges=inserted, ResidueWt=4250, CN2=70.75, Cona=8.7, U=8.2, OC=0.95, ResidueCNR=40, SWCon=0.24, DiffusConst=46, DiffusSlope=16}, {{urn:schemas-microsoft-com:xml-diffgram-v1}id=d60428e5-9dbc-49c0-88e3-25f3a898746d224, {urn:schemas-microsoft-com:xml-msdata}rowOrder=223, {urn:schemas-microsoft-com:xml-diffgram-v1}hasChanges=inserted, ResidueWt=4250, CN2=70.75, Cona=8.7, U=8.2, OC=1.7, ResidueCNR=40, SWCon=0.24, DiffusConst=46, DiffusSlope=16}, {{urn:schemas-microsoft-com:xml-diffgram-v1}id=d60428e5-9dbc-49c0-88e3-25f3a898746d225, {urn:schemas-microsoft-com:xml-msdata}rowOrder=224, {urn:schemas-microsoft-com:xml-diffgram-v1}hasChanges=inserted, ResidueWt=4250, CN2=70.75, Cona=8.7, U=4.2, OC=1.7, ResidueCNR=40, SWCon=0.24, DiffusConst=46, DiffusSlope=16}, {{urn:schemas-microsoft-com:xml-diffgram-v1}id=d60428e5-9dbc-49c0-88e3-25f3a898746d226, {urn:schemas-microsoft-com:xml-msdata}rowOrder=225, {urn:schemas-microsoft-com:xml-diffgram-v1}hasChanges=inserted, ResidueWt=4250, CN2=70.75, Cona=8.7, U=4.2, OC=1.7, ResidueCNR=40, SWCon=0.24, DiffusConst=26, DiffusSlope=16}, {{urn:schemas-microsoft-com:xml-diffgram-v1}id=d60428e5-9dbc-49c0-88e3-25f3a898746d227, {urn:schemas-microsoft-com:xml-msdata}rowOrder=226, {urn:schemas-microsoft-com:xml-diffgram-v1}hasChanges=inserted, ResidueWt=4250, CN2=78.25, Cona=8.7, U=4.2, OC=1.7, ResidueCNR=40, SWCon=0.24, DiffusConst=26, DiffusSlope=16}, {{urn:schemas-microsoft-com:xml-diffgram-v1}id=d60428e5-9dbc-49c0-88e3-25f3a898746d228, {urn:schemas-microsoft-com:xml-msdata}rowOrder=227, {urn:schemas-microsoft-com:xml-diffgram-v1}hasChanges=inserted, ResidueWt=1750, CN2=78.25, Cona=8.7, U=4.2, OC=1.7, ResidueCNR=40, SWCon=0.24, DiffusConst=26, DiffusSlope=16}, {{urn:schemas-microsoft-com:xml-diffgram-v1}id=d60428e5-9dbc-49c0-88e3-25f3a898746d229, {urn:schemas-microsoft-com:xml-msdata}rowOrder=228, {urn:schemas-microsoft-com:xml-diffgram-v1}hasChanges=inserted, ResidueWt=1750, CN2=78.25, Cona=5.7, U=4.2, OC=1.7, ResidueCNR=40, SWCon=0.24, DiffusConst=26, DiffusSlope=16}, {{urn:schemas-microsoft-com:xml-diffgram-v1}id=d60428e5-9dbc-49c0-88e3-25f3a898746d230, {urn:schemas-microsoft-com:xml-msdata}rowOrder=229, {urn:schemas-microsoft-com:xml-diffgram-v1}hasChanges=inserted, ResidueWt=1750, CN2=78.25, Cona=5.7, U=4.2, OC=1.7, ResidueCNR=40, SWCon=0.24, DiffusConst=26, DiffusSlope=11}, {{urn:schemas-microsoft-com:xml-diffgram-v1}id=d60428e5-9dbc-49c0-88e3-25f3a898746d231, {urn:schemas-microsoft-com:xml-msdata}rowOrder=230, {urn:schemas-microsoft-com:xml-diffgram-v1}hasChanges=inserted, ResidueWt=3750, CN2=85, Cona=4.2, U=5.8, OC=1.475, ResidueCNR=68, SWCon=0.26, DiffusConst=24, DiffusSlope=15}, {{urn:schemas-microsoft-com:xml-diffgram-v1}id=d60428e5-9dbc-49c0-88e3-25f3a898746d232, {urn:schemas-microsoft-com:xml-msdata}rowOrder=231, {urn:schemas-microsoft-com:xml-diffgram-v1}hasChanges=inserted, ResidueWt=3750, CN2=85, Cona=4.2, U=5.8, OC=1.475, ResidueCNR=68, SWCon=0.26, DiffusConst=44, DiffusSlope=15}, {{urn:schemas-microsoft-com:xml-diffgram-v1}id=d60428e5-9dbc-49c0-88e3-25f3a898746d233, {urn:schemas-microsoft-com:xml-msdata}rowOrder=232, {urn:schemas-microsoft-com:xml-diffgram-v1}hasChanges=inserted, ResidueWt=3750, CN2=77.5, Cona=4.2, U=5.8, OC=1.475, ResidueCNR=68, SWCon=0.26, DiffusConst=44, DiffusSlope=15}, {{urn:schemas-microsoft-com:xml-diffgram-v1}id=d60428e5-9dbc-49c0-88e3-25f3a898746d234, {urn:schemas-microsoft-com:xml-msdata}rowOrder=233, {urn:schemas-microsoft-com:xml-diffgram-v1}hasChanges=inserted, ResidueWt=3750, CN2=77.5, Cona=4.2, U=5.8, OC=1.475, ResidueCNR=68, SWCon=0.26, DiffusConst=44, DiffusSlope=10}, {{urn:schemas-microsoft-com:xml-diffgram-v1}id=d60428e5-9dbc-49c0-88e3-25f3a898746d235, {urn:schemas-microsoft-com:xml-msdata}rowOrder=234, {urn:schemas-microsoft-com:xml-diffgram-v1}hasChanges=inserted, ResidueWt=3750, CN2=77.5, Cona=4.2, U=5.8, OC=0.725, ResidueCNR=68, SWCon=0.26, DiffusConst=44, DiffusSlope=10}, {{urn:schemas-microsoft-com:xml-diffgram-v1}id=d60428e5-9dbc-49c0-88e3-25f3a898746d236, {urn:schemas-microsoft-com:xml-msdata}rowOrder=235, {urn:schemas-microsoft-com:xml-diffgram-v1}hasChanges=inserted, ResidueWt=1250, CN2=77.5, Cona=4.2, U=5.8, OC=0.725, ResidueCNR=68, SWCon=0.26, DiffusConst=44, DiffusSlope=10}, {{urn:schemas-microsoft-com:xml-diffgram-v1}id=d60428e5-9dbc-49c0-88e3-25f3a898746d237, {urn:schemas-microsoft-com:xml-msdata}rowOrder=236, {urn:schemas-microsoft-com:xml-diffgram-v1}hasChanges=inserted, ResidueWt=1250, CN2=77.5, Cona=7.2, U=5.8, OC=0.725, ResidueCNR=68, SWCon=0.26, DiffusConst=44, DiffusSlope=10}, {{urn:schemas-microsoft-com:xml-diffgram-v1}id=d60428e5-9dbc-49c0-88e3-25f3a898746d238, {urn:schemas-microsoft-com:xml-msdata}rowOrder=237, {urn:schemas-microsoft-com:xml-diffgram-v1}hasChanges=inserted, ResidueWt=1250, CN2=77.5, Cona=7.2, U=5.8, OC=0.725, ResidueCNR=68, SWCon=0.46, DiffusConst=44, DiffusSlope=10}, {{urn:schemas-microsoft-com:xml-diffgram-v1}id=d60428e5-9dbc-49c0-88e3-25f3a898746d239, {urn:schemas-microsoft-com:xml-msdata}rowOrder=238, {urn:schemas-microsoft-com:xml-diffgram-v1}hasChanges=inserted, ResidueWt=1250, CN2=77.5, Cona=7.2, U=1.8, OC=0.725, ResidueCNR=68, SWCon=0.46, DiffusConst=44, DiffusSlope=10}, {{urn:schemas-microsoft-com:xml-diffgram-v1}id=d60428e5-9dbc-49c0-88e3-25f3a898746d240, {urn:schemas-microsoft-com:xml-msdata}rowOrder=239, {urn:schemas-microsoft-com:xml-diffgram-v1}hasChanges=inserted, ResidueWt=1250, CN2=77.5, Cona=7.2, U=1.8, OC=0.725, ResidueCNR=108, SWCon=0.46, DiffusConst=44, DiffusSlope=10}, {{urn:schemas-microsoft-com:xml-diffgram-v1}id=d60428e5-9dbc-49c0-88e3-25f3a898746d241, {urn:schemas-microsoft-com:xml-msdata}rowOrder=240, {urn:schemas-microsoft-com:xml-diffgram-v1}hasChanges=inserted, ResidueWt=2500, CN2=84.25, Cona=5.7, U=2.2, OC=0.65, ResidueCNR=112, SWCon=0.46, DiffusConst=46, DiffusSlope=12.5}, {{urn:schemas-microsoft-com:xml-diffgram-v1}id=d60428e5-9dbc-49c0-88e3-25f3a898746d242, {urn:schemas-microsoft-com:xml-msdata}rowOrder=241, {urn:schemas-microsoft-com:xml-diffgram-v1}hasChanges=inserted, ResidueWt=2500, CN2=84.25, Cona=5.7, U=2.2, OC=0.65, ResidueCNR=112, SWCon=0.46, DiffusConst=26, DiffusSlope=12.5}, {{urn:schemas-microsoft-com:xml-diffgram-v1}id=d60428e5-9dbc-49c0-88e3-25f3a898746d243, {urn:schemas-microsoft-com:xml-msdata}rowOrder=242, {urn:schemas-microsoft-com:xml-diffgram-v1}hasChanges=inserted, ResidueWt=2500, CN2=84.25, Cona=5.7, U=2.2, OC=1.4, ResidueCNR=112, SWCon=0.46, DiffusConst=26, DiffusSlope=12.5}, {{urn:schemas-microsoft-com:xml-diffgram-v1}id=d60428e5-9dbc-49c0-88e3-25f3a898746d244, {urn:schemas-microsoft-com:xml-msdata}rowOrder=243, {urn:schemas-microsoft-com:xml-diffgram-v1}hasChanges=inserted, ResidueWt=2500, CN2=84.25, Cona=5.7, U=2.2, OC=1.4, ResidueCNR=112, SWCon=0.46, DiffusConst=26, DiffusSlope=17.5}, {{urn:schemas-microsoft-com:xml-diffgram-v1}id=d60428e5-9dbc-49c0-88e3-25f3a898746d245, {urn:schemas-microsoft-com:xml-msdata}rowOrder=244, {urn:schemas-microsoft-com:xml-diffgram-v1}hasChanges=inserted, ResidueWt=2500, CN2=84.25, Cona=5.7, U=2.2, OC=1.4, ResidueCNR=72, SWCon=0.46, DiffusConst=26, DiffusSlope=17.5}, {{urn:schemas-microsoft-com:xml-diffgram-v1}id=d60428e5-9dbc-49c0-88e3-25f3a898746d246, {urn:schemas-microsoft-com:xml-msdata}rowOrder=245, {urn:schemas-microsoft-com:xml-diffgram-v1}hasChanges=inserted, ResidueWt=2500, CN2=76.75, Cona=5.7, U=2.2, OC=1.4, ResidueCNR=72, SWCon=0.46, DiffusConst=26, DiffusSlope=17.5}, {{urn:schemas-microsoft-com:xml-diffgram-v1}id=d60428e5-9dbc-49c0-88e3-25f3a898746d247, {urn:schemas-microsoft-com:xml-msdata}rowOrder=246, {urn:schemas-microsoft-com:xml-diffgram-v1}hasChanges=inserted, ResidueWt=2500, CN2=76.75, Cona=5.7, U=6.2, OC=1.4, ResidueCNR=72, SWCon=0.46, DiffusConst=26, DiffusSlope=17.5}, {{urn:schemas-microsoft-com:xml-diffgram-v1}id=d60428e5-9dbc-49c0-88e3-25f3a898746d248, {urn:schemas-microsoft-com:xml-msdata}rowOrder=247, {urn:schemas-microsoft-com:xml-diffgram-v1}hasChanges=inserted, ResidueWt=2500, CN2=76.75, Cona=5.7, U=6.2, OC=1.4, ResidueCNR=72, SWCon=0.26, DiffusConst=26, DiffusSlope=17.5}, {{urn:schemas-microsoft-com:xml-diffgram-v1}id=d60428e5-9dbc-49c0-88e3-25f3a898746d249, {urn:schemas-microsoft-com:xml-msdata}rowOrder=248, {urn:schemas-microsoft-com:xml-diffgram-v1}hasChanges=inserted, ResidueWt=5000, CN2=76.75, Cona=5.7, U=6.2, OC=1.4, ResidueCNR=72, SWCon=0.26, DiffusConst=26, DiffusSlope=17.5}, {{urn:schemas-microsoft-com:xml-diffgram-v1}id=d60428e5-9dbc-49c0-88e3-25f3a898746d250, {urn:schemas-microsoft-com:xml-msdata}rowOrder=249, {urn:schemas-microsoft-com:xml-diffgram-v1}hasChanges=inserted, ResidueWt=5000, CN2=76.75, Cona=8.7, U=6.2, OC=1.4, ResidueCNR=72, SWCon=0.26, DiffusConst=26, DiffusSlope=17.5}]]}
    Parameters:
      {Name=ResidueWt, Path=Field.SurfaceOrganicMatter.InitialResidueMass, LowerBound=0, UpperBound=5000}
      {Name=CN2, Path=Field.Soil.SoilWater.CN2Bare, LowerBound=70, UpperBound=85}
      {Name=Cona, Path=Field.Soil.SoilWater.SummerCona, LowerBound=3, UpperBound=9}
      {Name=U, Path=Field.Soil.SoilWater.SummerU, LowerBound=1, UpperBound=9}
      {Name=OC, Path=Field.Soil.SoilOrganicMatter.OC[1], LowerBound=0.5, UpperBound=2}
      {Name=ResidueCNR, Path=Field.SurfaceOrganicMatter.InitialCNR, LowerBound=40, UpperBound=120}
      {Name=SWCon, Path=Field.Soil.SoilWater.SWCON[1], LowerBound=0.1, UpperBound=0.5}
      {Name=DiffusConst, Path=Field.Soil.SoilWater.DiffusConst, LowerBound=20, UpperBound=60}
      {Name=DiffusSlope, Path=Field.Soil.SoilWater.DiffusSlope, LowerBound=10, UpperBound=20}
    Years=[1981, 1982, 1983, 1984, 1985, 1986, 1987, 1988, 1989, 1990]
    Simulation FallowSensitivityBase
      Clock: StartDate=1980-10-31; EndDate=1990-12-31
      Summary SummaryFile
      Weather: FileName=%root%\Examples\WeatherFiles\Dalby.met
      SoilArbitrator
      Zone Field: Area=1; Slope=0
        Report: EventNames=[ResetAndOutput].Script.Reporting
          VariableNames:
            [Clock].Today
            [Clock].Today.Year
            Sum of [Weather].Rain from [ResetAndOutput].Script.Reseting to [ResetAndOutput].Script.Reporting as FallowRainfall
            Sum of [Soil].SoilWater.Es from [ResetAndOutput].Script.Reseting to [ResetAndOutput].Script.Reporting as FallowEvaporation
            Sum of [Soil].SoilWater.Runoff from [ResetAndOutput].Script.Reseting to [ResetAndOutput].Script.Reporting as FallowRunoff
            sum([Soil].SoilWater.SWmm) as TotalSW
            sum([Soil].SoilWater.ESW) as TotalESW
            (sum([Soil].SoilNitrogen.NH4) + sum([Soil].SoilNitrogen.NO3)) as TotalMinN
            [SurfaceOrganicMatter].Wt as FinalResidueWt
            [SurfaceOrganicMatter].Cover as FinalResidueCover
        Fertiliser
        Soil: ASCOrder=Vertosol; ASCSubOrder=Black; SoilType=Clay; Site=Norwin; NearestTown=Norwin; Region=Darling Downs and Granite Belt; State=Queensland; Country=Australia; NaturalVegetation=Qld. Bluegrass, possible Qld. Blue gum; ApsoilNumber=900; Latitude=-27.581836; Longitude=151.320206; LocationAccuracy=+/- 20m
          DataSource=CSIRO Sustainable Ecosystems, Toowoomba; Characteriesd as part of the GRDC funded project"Doing it better, doing it smarter, managing soil water in Australian agriculture' 2011
          Comments=OC, CLL for all crops estimated-based on Bongeen Mywybilla Soil No1
          Water
            Thickness  BD       AirDry    LL15      DUL       SAT       KS
            150        1.01056  0.13025   0.2605    0.521     0.588655  20
            150        1.07146  0.198689  0.248362  0.496723  0.565677  20
            300        1.09394  0.28      0.28      0.488438  0.557193  20
            300        1.15861  0.28      0.28      0.480297  0.532787  20
            300        1.17301  0.28      0.28      0.471584  0.527354  20
            300        1.16287  0.28      0.28      0.457071  0.53118   20
            300        1.1875   0.28      0.28      0.452332  0.521888  20
            SoilCrop WheatSoil: LL=[0.261, 0.248, 0.28, 0.306, 0.36, 0.392, 0.446]; KL=[0.06, 0.06, 0.06, 0.04, 0.04, 0.02, 0.01]; XF=[1, 1, 1, 1, 1, 1, 1]
          SoilWater: SummerDate=1-Nov; SummerU=5; SummerCona=5; WinterDate=1-Apr; WinterU=5; WinterCona=5; DiffusConst=40; DiffusSlope=16; Salb=0.12; CN2Bare=73; CNRed=20; CNCov=0.8; max_pond=0; Thickness=[1800]; SWCON=[0.3]; ResidueInterception=0
          SoilNitrogen: fom_type=[default, manure, mucuna, lablab, shemp, stable]; fract_carb=[0.2, 0.3, 0.54, 0.57, 0.45, 0]; fract_cell=[0.7, 0.3, 0.37, 0.37, 0.47, 0.1]; fract_lign=[0.1, 0.4, 0.09, 0.06, 0.08, 0.9]
          SoilOrganicMatter: RootCN=40; RootWt=1000; SoilCN=12; EnrACoeff=7.4; EnrBCoeff=0.2; OCUnits=Total
            Thickness  OC    FBiom  FInert
            150        1.2   0.04   0.4
            150        0.96  0.02   0.6
            300        0.6   0.02   0.8
            300        0.3   0.02   1
            300        0.18  0.01   1
            300        0.12  0.01   1
            300        0.12  0.01   1
          Analysis: Thickness=[150, 150, 300, 300, 300, 300, 300]; PH=[8, 8, 8, 8, 8, 8, 8]; PHUnits=Water; BoronUnits=HotWater
          InitialWater: PercentMethod=FilledFromTop; FractionFull=0; RelativeTo=WheatSoil
          Sample InitialN: NO3Units=ppm; NH4Units=ppm; SWUnits=Volumetric; OCUnits=Total; PHUnits=Water
            Thickness  NO3  NH4
            150        1    0.1
            150        1    0.1
            300        1    0.1
            300        1    0.1
            300        1    0.1
            300        1    0.1
            300        1    0.1
          CERESSoilTemperature
        SurfaceOrganicMatter: InitialResidueName=wheat_stubble; InitialResidueType=wheat; InitialResidueMass=500; InitialStandingFraction=0; InitialCPR=0; InitialCNR=100; FractionFaecesAdded=0.5
        MicroClimate: a_interception=0; b_interception=1; c_interception=0; d_interception=0; soil_albedo=0.3; SoilHeatFluxFraction=0.4; NightInterceptionFraction=0.5; ReferenceHeight=2
        SoluteManager
        Manager ResetAndOutput
          OutputDate = 30-Apr
          ResetDate = 1-Nov
          ResetWater = Yes
          ResetN = Yes
          ResetSOM = Yes
```csharp
using System;
using Models.Core;
using Models.PMF;
using Models.Soils;
using Models.Soils.Nutrients;
using Models.Interfaces;
using Models.Utilities;
using Models.Surface;
using APSIM.Shared.Utilities;
using Models.Report;

namespace Models
{
    [Serializable]
    public class Script : Model
    {
        [Link] Clock Clock;
        [Link] SoilWater SoilWater = null;
        [Link] INutrient Nutrient = null;
        [Link] SurfaceOrganicMatter SOM = null;
        [Link] Summary Summary;
        [Link] Report.Report Report;

        [Description("Date for output:")]
        public string OutputDate {get;set;}

        [Description("Date for reset:")]
        public string ResetDate {get;set;}

        [Description("Reset Water?")]
        public string ResetWater {get;set;}

        [Description("Reset Nitrogen?")]
        public string ResetN {get;set;}

        [Description("Reset Surface Organic Matter?")]
        public string ResetSOM {get;set;}

                /// <summary>Occurs when a plant is about to be harvested.</summary>
        public event EventHandler Reseting;
                /// <summary>Occurs when a plant is about to be harvested.</summary>
        public event EventHandler Reporting;


        [EventSubscribe("DoManagement")]
        private void OnDoManagement(object sender, EventArgs e)
        {
            if (DateUtilities.WithinDates(OutputDate, Clock.Today, OutputDate))
            {
               Reporting.Invoke(this, new EventArgs());
               //Report.DoOutput();
            }

            if (DateUtilities.WithinDates(ResetDate, Clock.Today, ResetDate))
            {
                if (ResetWater == "Yes")
                {
                    Summary.WriteMessage(this, "Reset Water");
                    SoilWater.Reset();
                }
                if (ResetN == "Yes")
                {
                    Summary.WriteMessage(this, "Reset Nitrogen");
                    Nutrient.Reset();
                }
                if (ResetSOM == "Yes")
                {
                    Summary.WriteMessage(this, "Reset Surface OM");
                    SOM.Reset();
                }

                Reseting.Invoke(this, new EventArgs());
            }
        }
    }
}
```
    Folder Morris Analysis
      Memo
        Results for this analysis are demonstrated here using the traditional Morris Sensitivity graphing format.  The overal parameter sensitivity (Mean Absolute Elementary Effect, MuStar) is on the X-axis.  The indication of non-linear response or parameter interaction (Standard deviation of Elementary Effect, Sigma) is on the Y axis.
        In the example, predictions for total soil water at the end of the fallow were most sensitive to ResidueWt, ConA, U and CN2.  Note that in some situations, the sensitivity to these parameters show high levels of interaction with other parameters.

        Each series within the graph includes results for 10 fallow seasons.  The variation within a given series demonstrates the impact of season on parameter sensitivity.  This is sometimes referred to as model placticity (ie model sensitivity varies in response to the prevailing conditions).  The high levels of variation within each series shows the importance of conducting sensitivity analyses over a range of seasons to get a full picture of parameter sensitivity.

        A second set of plots shows changes in parameter rankings between years.  These plots show values of MuStar for each parameter ploted against year.  Where lines cross, parameter sensitivity ranking has changed between years.
    Folder PathAnalysis
      Memo
        The Morris method uses a series of parameter paths (or trajectories) through the N-dimensional parameter space selected by the user.  It is important that this number of paths is sufficient to fully explore the parameter space, but also to account for responses in the model.  Graphs such as these indicate the impact of the number of paths on estimates of MuStar.  If the number of paths is sufficient, MuStar should not change significantly with increasing numbers of paths within the analysis.  In this example, some savings in execution time could potentially be gained from a reduction in the number of parameter paths.
    Folder ClimateAnalysis
      Memo
        The initial graphs for the Morris Sensitivity Analysis showed variation in parameter sensitivity (MuStar) and interaction (Sigma) across the seasons within this analysis.  These graphs explore some of the cause of the variation through plotting MuStar against rainfall within each fallow.  In many cases, clear trends in parameter sensitivity or interaction can be seen with seasonal rainfall.

        Any more detailed parameter sensitivity analysis could use information such as this to choose a subset of conditions for more detailed study rather than conducting the analysis for all years within a long term climate record.  This may provide a reduction in execution time.
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