Simulations: Version=46
  DataStore
  Morris: NumPaths=50; Years=[1996, 1997, 1998, 1999, 2000]
    ParameterValues={diffgram=[[{{urn:schemas-microsoft-com:xml-diffgram-v1}id=65aa4ec9-19f3-4fed-9115-26c784f194591, {urn:schemas-microsoft-com:xml-msdata}rowOrder=0, {urn:schemas-microsoft-com:xml-diffgram-v1}hasChanges=inserted, ResidueWt=2368.42114, FASW=0.105263, CN2=81.0526352, Cona=5.21052647}, {{urn:schemas-microsoft-com:xml-diffgram-v1}id=65aa4ec9-19f3-4fed-9115-26c784f194592, {urn:schemas-microsoft-com:xml-msdata}rowOrder=1, {urn:schemas-microsoft-com:xml-diffgram-v1}hasChanges=inserted, ResidueWt=2368.42114, FASW=0.105263, CN2=73.1579, Cona=5.21052647}, {{urn:schemas-microsoft-com:xml-diffgram-v1}id=65aa4ec9-19f3-4fed-9115-26c784f194593, {urn:schemas-microsoft-com:xml-msdata}rowOrder=2, {urn:schemas-microsoft-com:xml-diffgram-v1}hasChanges=inserted, ResidueWt=2368.42114, FASW=0.105263, CN2=73.1579, Cona=8.368421}, {{urn:schemas-microsoft-com:xml-diffgram-v1}id=65aa4ec9-19f3-4fed-9115-26c784f194594, {urn:schemas-microsoft-com:xml-msdata}rowOrder=3, {urn:schemas-microsoft-com:xml-diffgram-v1}hasChanges=inserted, ResidueWt=2368.42114, FASW=0.6315789, CN2=73.1579, Cona=8.368421}, {{urn:schemas-microsoft-com:xml-diffgram-v1}id=65aa4ec9-19f3-4fed-9115-26c784f194595, {urn:schemas-microsoft-com:xml-msdata}rowOrder=4, {urn:schemas-microsoft-com:xml-diffgram-v1}hasChanges=inserted, ResidueWt=5000, FASW=0.6315789, CN2=73.1579, Cona=8.368421}, {{urn:schemas-microsoft-com:xml-diffgram-v1}id=65aa4ec9-19f3-4fed-9115-26c784f194596, {urn:schemas-microsoft-com:xml-msdata}rowOrder=5, {urn:schemas-microsoft-com:xml-diffgram-v1}hasChanges=inserted, ResidueWt=526.3158, FASW=0.7894737, CN2=77.89474, Cona=4.263158}, {{urn:schemas-microsoft-com:xml-diffgram-v1}id=65aa4ec9-19f3-4fed-9115-26c784f194597, {urn:schemas-microsoft-com:xml-msdata}rowOrder=6, {urn:schemas-microsoft-com:xml-diffgram-v1}hasChanges=inserted, ResidueWt=526.3158, FASW=0.2631579, CN2=77.89474, Cona=4.263158}, {{urn:schemas-microsoft-com:xml-diffgram-v1}id=65aa4ec9-19f3-4fed-9115-26c784f194598, {urn:schemas-microsoft-com:xml-msdata}rowOrder=7, {urn:schemas-microsoft-com:xml-diffgram-v1}hasChanges=inserted, ResidueWt=526.3158, FASW=0.2631579, CN2=77.89474, Cona=7.42105246}, {{urn:schemas-microsoft-com:xml-diffgram-v1}id=65aa4ec9-19f3-4fed-9115-26c784f194599, {urn:schemas-microsoft-com:xml-msdata}rowOrder=8, {urn:schemas-microsoft-com:xml-diffgram-v1}hasChanges=inserted, ResidueWt=3157.89478, FASW=0.2631579, CN2=77.89474, Cona=7.42105246}, {{urn:schemas-microsoft-com:xml-diffgram-v1}id=65aa4ec9-19f3-4fed-9115-26c784f1945910, {urn:schemas-microsoft-com:xml-msdata}rowOrder=9, {urn:schemas-microsoft-com:xml-diffgram-v1}hasChanges=inserted, ResidueWt=3157.89478, FASW=0.2631579, CN2=70, Cona=7.42105246}, {{urn:schemas-microsoft-com:xml-diffgram-v1}id=65aa4ec9-19f3-4fed-9115-26c784f1945911, {urn:schemas-microsoft-com:xml-msdata}rowOrder=10, {urn:schemas-microsoft-com:xml-diffgram-v1}hasChanges=inserted, ResidueWt=4736.84229, FASW=0.315789, CN2=78.68421, Cona=3.31578946}, {{urn:schemas-microsoft-com:xml-diffgram-v1}id=65aa4ec9-19f3-4fed-9115-26c784f1945912, {urn:schemas-microsoft-com:xml-msdata}rowOrder=11, {urn:schemas-microsoft-com:xml-diffgram-v1}hasChanges=inserted, ResidueWt=2105.26318, FASW=0.315789, CN2=78.68421, Cona=3.31578946}, {{urn:schemas-microsoft-com:xml-diffgram-v1}id=65aa4ec9-19f3-4fed-9115-26c784f1945913, {urn:schemas-microsoft-com:xml-msdata}rowOrder=12, {urn:schemas-microsoft-com:xml-diffgram-v1}hasChanges=inserted, ResidueWt=2105.26318, FASW=0.315789, CN2=78.68421, Cona=6.47368431}, {{urn:schemas-microsoft-com:xml-diffgram-v1}id=65aa4ec9-19f3-4fed-9115-26c784f1945914, {urn:schemas-microsoft-com:xml-msdata}rowOrder=13, {urn:schemas-microsoft-com:xml-diffgram-v1}hasChanges=inserted, ResidueWt=2105.26318, FASW=0.842105, CN2=78.68421, Cona=6.47368431}, {{urn:schemas-microsoft-com:xml-diffgram-v1}id=65aa4ec9-19f3-4fed-9115-26c784f1945915, {urn:schemas-microsoft-com:xml-msdata}rowOrder=14, {urn:schemas-microsoft-com:xml-diffgram-v1}hasChanges=inserted, ResidueWt=2105.26318, FASW=0.842105, CN2=70.7894745, Cona=6.47368431}, {{urn:schemas-microsoft-com:xml-diffgram-v1}id=65aa4ec9-19f3-4fed-9115-26c784f1945916, {urn:schemas-microsoft-com:xml-msdata}rowOrder=15, {urn:schemas-microsoft-com:xml-diffgram-v1}hasChanges=inserted, ResidueWt=4210.52637, FASW=0.6315789, CN2=77.89474, Cona=6.47368431}, {{urn:schemas-microsoft-com:xml-diffgram-v1}id=65aa4ec9-19f3-4fed-9115-26c784f1945917, {urn:schemas-microsoft-com:xml-msdata}rowOrder=16, {urn:schemas-microsoft-com:xml-diffgram-v1}hasChanges=inserted, ResidueWt=1578.94739, FASW=0.6315789, CN2=77.89474, Cona=6.47368431}, {{urn:schemas-microsoft-com:xml-diffgram-v1}id=65aa4ec9-19f3-4fed-9115-26c784f1945918, {urn:schemas-microsoft-com:xml-msdata}rowOrder=17, {urn:schemas-microsoft-com:xml-diffgram-v1}hasChanges=inserted, ResidueWt=1578.94739, FASW=0.6315789, CN2=77.89474, Cona=3.31578946}, {{urn:schemas-microsoft-com:xml-diffgram-v1}id=65aa4ec9-19f3-4fed-9115-26c784f1945919, {urn:schemas-microsoft-com:xml-msdata}rowOrder=18, {urn:schemas-microsoft-com:xml-diffgram-v1}hasChanges=inserted, ResidueWt=1578.94739, FASW=0.105263, CN2=77.89474, Cona=3.31578946}, {{urn:schemas-microsoft-com:xml-diffgram-v1}id=65aa4ec9-19f3-4fed-9115-26c784f1945920, {urn:schemas-microsoft-com:xml-msdata}rowOrder=19, {urn:schemas-microsoft-com:xml-diffgram-v1}hasChanges=inserted, ResidueWt=1578.94739, FASW=0.105263, CN2=70, Cona=3.31578946}, {{urn:schemas-microsoft-com:xml-diffgram-v1}id=65aa4ec9-19f3-4fed-9115-26c784f1945921, {urn:schemas-microsoft-com:xml-msdata}rowOrder=20, {urn:schemas-microsoft-com:xml-diffgram-v1}hasChanges=inserted, ResidueWt=1842.10522, FASW=0.7368421, CN2=82.63158, Cona=6.78947353}, {{urn:schemas-microsoft-com:xml-diffgram-v1}id=65aa4ec9-19f3-4fed-9115-26c784f1945922, {urn:schemas-microsoft-com:xml-msdata}rowOrder=21, {urn:schemas-microsoft-com:xml-diffgram-v1}hasChanges=inserted, ResidueWt=4473.684, FASW=0.7368421, CN2=82.63158, Cona=6.78947353}, {{urn:schemas-microsoft-com:xml-diffgram-v1}id=65aa4ec9-19f3-4fed-9115-26c784f1945923, {urn:schemas-microsoft-com:xml-msdata}rowOrder=22, {urn:schemas-microsoft-com:xml-diffgram-v1}hasChanges=inserted, ResidueWt=4473.684, FASW=0.7368421, CN2=82.63158, Cona=3.631579}, {{urn:schemas-microsoft-com:xml-diffgram-v1}id=65aa4ec9-19f3-4fed-9115-26c784f1945924, {urn:schemas-microsoft-com:xml-msdata}rowOrder=23, {urn:schemas-microsoft-com:xml-diffgram-v1}hasChanges=inserted, ResidueWt=4473.684, FASW=0.7368421, CN2=74.73684, Cona=3.631579}, {{urn:schemas-microsoft-com:xml-diffgram-v1}id=65aa4ec9-19f3-4fed-9115-26c784f1945925, {urn:schemas-microsoft-com:xml-msdata}rowOrder=24, {urn:schemas-microsoft-com:xml-diffgram-v1}hasChanges=inserted, ResidueWt=4473.684, FASW=0.210526, CN2=74.73684, Cona=3.631579}, {{urn:schemas-microsoft-com:xml-diffgram-v1}id=65aa4ec9-19f3-4fed-9115-26c784f1945926, {urn:schemas-microsoft-com:xml-msdata}rowOrder=25, {urn:schemas-microsoft-com:xml-diffgram-v1}hasChanges=inserted, ResidueWt=4736.84229, FASW=0.684211, CN2=73.1579, Cona=8.684211}, {{urn:schemas-microsoft-com:xml-diffgram-v1}id=65aa4ec9-19f3-4fed-9115-26c784f1945927, {urn:schemas-microsoft-com:xml-msdata}rowOrder=26, {urn:schemas-microsoft-com:xml-diffgram-v1}hasChanges=inserted, ResidueWt=2105.26318, FASW=0.684211, CN2=73.1579, Cona=8.684211}, {{urn:schemas-microsoft-com:xml-diffgram-v1}id=65aa4ec9-19f3-4fed-9115-26c784f1945928, {urn:schemas-microsoft-com:xml-msdata}rowOrder=27, {urn:schemas-microsoft-com:xml-diffgram-v1}hasChanges=inserted, ResidueWt=2105.26318, FASW=0.684211, CN2=81.0526352, Cona=8.684211}, {{urn:schemas-microsoft-com:xml-diffgram-v1}id=65aa4ec9-19f3-4fed-9115-26c784f1945929, {urn:schemas-microsoft-com:xml-msdata}rowOrder=28, {urn:schemas-microsoft-com:xml-diffgram-v1}hasChanges=inserted, ResidueWt=2105.26318, FASW=0.157895, CN2=81.0526352, Cona=8.684211}, {{urn:schemas-microsoft-com:xml-diffgram-v1}id=65aa4ec9-19f3-4fed-9115-26c784f1945930, {urn:schemas-microsoft-com:xml-msdata}rowOrder=29, {urn:schemas-microsoft-com:xml-diffgram-v1}hasChanges=inserted, ResidueWt=2105.26318, FASW=0.157895, CN2=81.0526352, Cona=5.52631569}, {{urn:schemas-microsoft-com:xml-diffgram-v1}id=65aa4ec9-19f3-4fed-9115-26c784f1945931, {urn:schemas-microsoft-com:xml-msdata}rowOrder=30, {urn:schemas-microsoft-com:xml-diffgram-v1}hasChanges=inserted, ResidueWt=2105.26318, FASW=0.05263158, CN2=82.63158, Cona=4.57894754}, {{urn:schemas-microsoft-com:xml-diffgram-v1}id=65aa4ec9-19f3-4fed-9115-26c784f1945932, {urn:schemas-microsoft-com:xml-msdata}rowOrder=31, {urn:schemas-microsoft-com:xml-diffgram-v1}hasChanges=inserted, ResidueWt=2105.26318, FASW=0.05263158, CN2=74.73684, Cona=4.57894754}, {{urn:schemas-microsoft-com:xml-diffgram-v1}id=65aa4ec9-19f3-4fed-9115-26c784f1945933, {urn:schemas-microsoft-com:xml-msdata}rowOrder=32, {urn:schemas-microsoft-com:xml-diffgram-v1}hasChanges=inserted, ResidueWt=2105.26318, FASW=0.05263158, CN2=74.73684, Cona=7.736842}, {{urn:schemas-microsoft-com:xml-diffgram-v1}id=65aa4ec9-19f3-4fed-9115-26c784f1945934, {urn:schemas-microsoft-com:xml-msdata}rowOrder=33, {urn:schemas-microsoft-com:xml-diffgram-v1}hasChanges=inserted, ResidueWt=4736.84229, FASW=0.05263158, CN2=74.73684, Cona=7.736842}, {{urn:schemas-microsoft-com:xml-diffgram-v1}id=65aa4ec9-19f3-4fed-9115-26c784f1945935, {urn:schemas-microsoft-com:xml-msdata}rowOrder=34, {urn:schemas-microsoft-com:xml-diffgram-v1}hasChanges=inserted, ResidueWt=4736.84229, FASW=0.578947, CN2=74.73684, Cona=7.736842}, {{urn:schemas-microsoft-com:xml-diffgram-v1}id=65aa4ec9-19f3-4fed-9115-26c784f1945936, {urn:schemas-microsoft-com:xml-msdata}rowOrder=35, {urn:schemas-microsoft-com:xml-diffgram-v1}hasChanges=inserted, ResidueWt=526.3158, FASW=0.105263, CN2=80.26316, Cona=5.84210539}, {{urn:schemas-microsoft-com:xml-diffgram-v1}id=65aa4ec9-19f3-4fed-9115-26c784f1945937, {urn:schemas-microsoft-com:xml-msdata}rowOrder=36, {urn:schemas-microsoft-com:xml-diffgram-v1}hasChanges=inserted, ResidueWt=526.3158, FASW=0.6315789, CN2=80.26316, Cona=5.84210539}, {{urn:schemas-microsoft-com:xml-diffgram-v1}id=65aa4ec9-19f3-4fed-9115-26c784f1945938, {urn:schemas-microsoft-com:xml-msdata}rowOrder=37, {urn:schemas-microsoft-com:xml-diffgram-v1}hasChanges=inserted, ResidueWt=526.3158, FASW=0.6315789, CN2=80.26316, Cona=9}, {{urn:schemas-microsoft-com:xml-diffgram-v1}id=65aa4ec9-19f3-4fed-9115-26c784f1945939, {urn:schemas-microsoft-com:xml-msdata}rowOrder=38, {urn:schemas-microsoft-com:xml-diffgram-v1}hasChanges=inserted, ResidueWt=3157.89478, FASW=0.6315789, CN2=80.26316, Cona=9}, {{urn:schemas-microsoft-com:xml-diffgram-v1}id=65aa4ec9-19f3-4fed-9115-26c784f1945940, {urn:schemas-microsoft-com:xml-msdata}rowOrder=39, {urn:schemas-microsoft-com:xml-diffgram-v1}hasChanges=inserted, ResidueWt=3157.89478, FASW=0.6315789, CN2=72.36842, Cona=9}, {{urn:schemas-microsoft-com:xml-diffgram-v1}id=65aa4ec9-19f3-4fed-9115-26c784f1945941, {urn:schemas-microsoft-com:xml-msdata}rowOrder=40, {urn:schemas-microsoft-com:xml-diffgram-v1}hasChanges=inserted, ResidueWt=2631.57886, FASW=0.157895, CN2=71.57895, Cona=3.94736838}, {{urn:schemas-microsoft-com:xml-diffgram-v1}id=65aa4ec9-19f3-4fed-9115-26c784f1945942, {urn:schemas-microsoft-com:xml-msdata}rowOrder=41, {urn:schemas-microsoft-com:xml-diffgram-v1}hasChanges=inserted, ResidueWt=2631.57886, FASW=0.157895, CN2=71.57895, Cona=7.105263}, {{urn:schemas-microsoft-com:xml-diffgram-v1}id=65aa4ec9-19f3-4fed-9115-26c784f1945943, {urn:schemas-microsoft-com:xml-msdata}rowOrder=42, {urn:schemas-microsoft-com:xml-diffgram-v1}hasChanges=inserted, ResidueWt=0, FASW=0.157895, CN2=71.57895, Cona=7.105263}, {{urn:schemas-microsoft-com:xml-diffgram-v1}id=65aa4ec9-19f3-4fed-9115-26c784f1945944, {urn:schemas-microsoft-com:xml-msdata}rowOrder=43, {urn:schemas-microsoft-com:xml-diffgram-v1}hasChanges=inserted, ResidueWt=0, FASW=0.157895, CN2=79.47369, Cona=7.105263}, {{urn:schemas-microsoft-com:xml-diffgram-v1}id=65aa4ec9-19f3-4fed-9115-26c784f1945945, {urn:schemas-microsoft-com:xml-msdata}rowOrder=44, {urn:schemas-microsoft-com:xml-diffgram-v1}hasChanges=inserted, ResidueWt=0, FASW=0.684211, CN2=79.47369, Cona=7.105263}, {{urn:schemas-microsoft-com:xml-diffgram-v1}id=65aa4ec9-19f3-4fed-9115-26c784f1945946, {urn:schemas-microsoft-com:xml-msdata}rowOrder=45, {urn:schemas-microsoft-com:xml-diffgram-v1}hasChanges=inserted, ResidueWt=1052.63159, FASW=0.210526, CN2=84.2105255, Cona=5.84210539}, {{urn:schemas-microsoft-com:xml-diffgram-v1}id=65aa4ec9-19f3-4fed-9115-26c784f1945947, {urn:schemas-microsoft-com:xml-msdata}rowOrder=46, {urn:schemas-microsoft-com:xml-diffgram-v1}hasChanges=inserted, ResidueWt=1052.63159, FASW=0.210526, CN2=76.31579, Cona=5.84210539}, {{urn:schemas-microsoft-com:xml-diffgram-v1}id=65aa4ec9-19f3-4fed-9115-26c784f1945948, {urn:schemas-microsoft-com:xml-msdata}rowOrder=47, {urn:schemas-microsoft-com:xml-diffgram-v1}hasChanges=inserted, ResidueWt=1052.63159, FASW=0.7368421, CN2=76.31579, Cona=5.84210539}, {{urn:schemas-microsoft-com:xml-diffgram-v1}id=65aa4ec9-19f3-4fed-9115-26c784f1945949, {urn:schemas-microsoft-com:xml-msdata}rowOrder=48, {urn:schemas-microsoft-com:xml-diffgram-v1}hasChanges=inserted, ResidueWt=1052.63159, FASW=0.7368421, CN2=76.31579, Cona=9}, {{urn:schemas-microsoft-com:xml-diffgram-v1}id=65aa4ec9-19f3-4fed-9115-26c784f1945950, {urn:schemas-microsoft-com:xml-msdata}rowOrder=49, {urn:schemas-microsoft-com:xml-diffgram-v1}hasChanges=inserted, ResidueWt=3684.21045, FASW=0.7368421, CN2=76.31579, Cona=9}, {{urn:schemas-microsoft-com:xml-diffgram-v1}id=65aa4ec9-19f3-4fed-9115-26c784f1945951, {urn:schemas-microsoft-com:xml-msdata}rowOrder=50, {urn:schemas-microsoft-com:xml-diffgram-v1}hasChanges=inserted, ResidueWt=1842.10522, FASW=0.578947, CN2=72.36842, Cona=3.631579}, {{urn:schemas-microsoft-com:xml-diffgram-v1}id=65aa4ec9-19f3-4fed-9115-26c784f1945952, {urn:schemas-microsoft-com:xml-msdata}rowOrder=51, {urn:schemas-microsoft-com:xml-diffgram-v1}hasChanges=inserted, ResidueWt=1842.10522, FASW=0.578947, CN2=72.36842, Cona=6.78947353}, {{urn:schemas-microsoft-com:xml-diffgram-v1}id=65aa4ec9-19f3-4fed-9115-26c784f1945953, {urn:schemas-microsoft-com:xml-msdata}rowOrder=52, {urn:schemas-microsoft-com:xml-diffgram-v1}hasChanges=inserted, ResidueWt=1842.10522, FASW=0.05263158, CN2=72.36842, Cona=6.78947353}, {{urn:schemas-microsoft-com:xml-diffgram-v1}id=65aa4ec9-19f3-4fed-9115-26c784f1945954, {urn:schemas-microsoft-com:xml-msdata}rowOrder=53, {urn:schemas-microsoft-com:xml-diffgram-v1}hasChanges=inserted, ResidueWt=1842.10522, FASW=0.05263158, CN2=80.26316, Cona=6.78947353}, {{urn:schemas-microsoft-com:xml-diffgram-v1}id=65aa4ec9-19f3-4fed-9115-26c784f1945955, {urn:schemas-microsoft-com:xml-msdata}rowOrder=54, {urn:schemas-microsoft-com:xml-diffgram-v1}hasChanges=inserted, ResidueWt=4473.684, FASW=0.05263158, CN2=80.26316, Cona=6.78947353}, {{urn:schemas-microsoft-com:xml-diffgram-v1}id=65aa4ec9-19f3-4fed-9115-26c784f1945956, {urn:schemas-microsoft-com:xml-msdata}rowOrder=55, {urn:schemas-microsoft-com:xml-diffgram-v1}hasChanges=inserted, ResidueWt=3157.89478, FASW=0.315789, CN2=80.26316, Cona=7.105263}, {{urn:schemas-microsoft-com:xml-diffgram-v1}id=65aa4ec9-19f3-4fed-9115-26c784f1945957, {urn:schemas-microsoft-com:xml-msdata}rowOrder=56, {urn:schemas-microsoft-com:xml-diffgram-v1}hasChanges=inserted, ResidueWt=3157.89478, FASW=0.842105, CN2=80.26316, Cona=7.105263}, {{urn:schemas-microsoft-com:xml-diffgram-v1}id=65aa4ec9-19f3-4fed-9115-26c784f1945958, {urn:schemas-microsoft-com:xml-msdata}rowOrder=57, {urn:schemas-microsoft-com:xml-diffgram-v1}hasChanges=inserted, ResidueWt=526.3158, FASW=0.842105, CN2=80.26316, Cona=7.105263}, {{urn:schemas-microsoft-com:xml-diffgram-v1}id=65aa4ec9-19f3-4fed-9115-26c784f1945959, {urn:schemas-microsoft-com:xml-msdata}rowOrder=58, {urn:schemas-microsoft-com:xml-diffgram-v1}hasChanges=inserted, ResidueWt=526.3158, FASW=0.842105, CN2=80.26316, Cona=3.94736838}, {{urn:schemas-microsoft-com:xml-diffgram-v1}id=65aa4ec9-19f3-4fed-9115-26c784f1945960, {urn:schemas-microsoft-com:xml-msdata}rowOrder=59, {urn:schemas-microsoft-com:xml-diffgram-v1}hasChanges=inserted, ResidueWt=526.3158, FASW=0.842105, CN2=72.36842, Cona=3.94736838}, {{urn:schemas-microsoft-com:xml-diffgram-v1}id=65aa4ec9-19f3-4fed-9115-26c784f1945961, {urn:schemas-microsoft-com:xml-msdata}rowOrder=60, {urn:schemas-microsoft-com:xml-diffgram-v1}hasChanges=inserted, ResidueWt=4210.52637, FASW=0.842105, CN2=70, Cona=8.052631}, {{urn:schemas-microsoft-com:xml-diffgram-v1}id=65aa4ec9-19f3-4fed-9115-26c784f1945962, {urn:schemas-microsoft-com:xml-msdata}rowOrder=61, {urn:schemas-microsoft-com:xml-diffgram-v1}hasChanges=inserted, ResidueWt=4210.52637, FASW=0.842105, CN2=70, Cona=4.894737}, {{urn:schemas-microsoft-com:xml-diffgram-v1}id=65aa4ec9-19f3-4fed-9115-26c784f1945963, {urn:schemas-microsoft-com:xml-msdata}rowOrder=62, {urn:schemas-microsoft-com:xml-diffgram-v1}hasChanges=inserted, ResidueWt=4210.52637, FASW=0.315789, CN2=70, Cona=4.894737}, {{urn:schemas-microsoft-com:xml-diffgram-v1}id=65aa4ec9-19f3-4fed-9115-26c784f1945964, {urn:schemas-microsoft-com:xml-msdata}rowOrder=63, {urn:schemas-microsoft-com:xml-diffgram-v1}hasChanges=inserted, ResidueWt=4210.52637, FASW=0.315789, CN2=77.89474, Cona=4.894737}, {{urn:schemas-microsoft-com:xml-diffgram-v1}id=65aa4ec9-19f3-4fed-9115-26c784f1945965, {urn:schemas-microsoft-com:xml-msdata}rowOrder=64, {urn:schemas-microsoft-com:xml-diffgram-v1}hasChanges=inserted, ResidueWt=1578.94739, FASW=0.315789, CN2=77.89474, Cona=4.894737}, {{urn:schemas-microsoft-com:xml-diffgram-v1}id=65aa4ec9-19f3-4fed-9115-26c784f1945966, {urn:schemas-microsoft-com:xml-msdata}rowOrder=65, {urn:schemas-microsoft-com:xml-diffgram-v1}hasChanges=inserted, ResidueWt=2894.73682, FASW=0.421053, CN2=74.73684, Cona=3.631579}, {{urn:schemas-microsoft-com:xml-diffgram-v1}id=65aa4ec9-19f3-4fed-9115-26c784f1945967, {urn:schemas-microsoft-com:xml-msdata}rowOrder=66, {urn:schemas-microsoft-com:xml-diffgram-v1}hasChanges=inserted, ResidueWt=2894.73682, FASW=0.947368, CN2=74.73684, Cona=3.631579}, {{urn:schemas-microsoft-com:xml-diffgram-v1}id=65aa4ec9-19f3-4fed-9115-26c784f1945968, {urn:schemas-microsoft-com:xml-msdata}rowOrder=67, {urn:schemas-microsoft-com:xml-diffgram-v1}hasChanges=inserted, ResidueWt=2894.73682, FASW=0.947368, CN2=74.73684, Cona=6.78947353}, {{urn:schemas-microsoft-com:xml-diffgram-v1}id=65aa4ec9-19f3-4fed-9115-26c784f1945969, {urn:schemas-microsoft-com:xml-msdata}rowOrder=68, {urn:schemas-microsoft-com:xml-diffgram-v1}hasChanges=inserted, ResidueWt=2894.73682, FASW=0.947368, CN2=82.63158, Cona=6.78947353}, {{urn:schemas-microsoft-com:xml-diffgram-v1}id=65aa4ec9-19f3-4fed-9115-26c784f1945970, {urn:schemas-microsoft-com:xml-msdata}rowOrder=69, {urn:schemas-microsoft-com:xml-diffgram-v1}hasChanges=inserted, ResidueWt=263.1579, FASW=0.947368, CN2=82.63158, Cona=6.78947353}, {{urn:schemas-microsoft-com:xml-diffgram-v1}id=65aa4ec9-19f3-4fed-9115-26c784f1945971, {urn:schemas-microsoft-com:xml-msdata}rowOrder=70, {urn:schemas-microsoft-com:xml-diffgram-v1}hasChanges=inserted, ResidueWt=2105.26318, FASW=0, CN2=73.9473648, Cona=4.57894754}, {{urn:schemas-microsoft-com:xml-diffgram-v1}id=65aa4ec9-19f3-4fed-9115-26c784f1945972, {urn:schemas-microsoft-com:xml-msdata}rowOrder=71, {urn:schemas-microsoft-com:xml-diffgram-v1}hasChanges=inserted, ResidueWt=2105.26318, FASW=0, CN2=73.9473648, Cona=7.736842}, {{urn:schemas-microsoft-com:xml-diffgram-v1}id=65aa4ec9-19f3-4fed-9115-26c784f1945973, {urn:schemas-microsoft-com:xml-msdata}rowOrder=72, {urn:schemas-microsoft-com:xml-diffgram-v1}hasChanges=inserted, ResidueWt=4736.84229, FASW=0, CN2=73.9473648, Cona=7.736842}, {{urn:schemas-microsoft-com:xml-diffgram-v1}id=65aa4ec9-19f3-4fed-9115-26c784f1945974, {urn:schemas-microsoft-com:xml-msdata}rowOrder=73, {urn:schemas-microsoft-com:xml-diffgram-v1}hasChanges=inserted, ResidueWt=4736.84229, FASW=0, CN2=81.8421, Cona=7.736842}, {{urn:schemas-microsoft-com:xml-diffgram-v1}id=65aa4ec9-19f3-4fed-9115-26c784f1945975, {urn:schemas-microsoft-com:xml-msdata}rowOrder=74, {urn:schemas-microsoft-com:xml-diffgram-v1}hasChanges=inserted, ResidueWt=4736.84229, FASW=0.5263158, CN2=81.8421, Cona=7.736842}, {{urn:schemas-microsoft-com:xml-diffgram-v1}id=65aa4ec9-19f3-4fed-9115-26c784f1945976, {urn:schemas-microsoft-com:xml-msdata}rowOrder=75, {urn:schemas-microsoft-com:xml-diffgram-v1}hasChanges=inserted, ResidueWt=1052.63159, FASW=0.2631579, CN2=74.73684, Cona=7.42105246}, {{urn:schemas-microsoft-com:xml-diffgram-v1}id=65aa4ec9-19f3-4fed-9115-26c784f1945977, {urn:schemas-microsoft-com:xml-msdata}rowOrder=76, {urn:schemas-microsoft-com:xml-diffgram-v1}hasChanges=inserted, ResidueWt=1052.63159, FASW=0.2631579, CN2=82.63158, Cona=7.42105246}, {{urn:schemas-microsoft-com:xml-diffgram-v1}id=65aa4ec9-19f3-4fed-9115-26c784f1945978, {urn:schemas-microsoft-com:xml-msdata}rowOrder=77, {urn:schemas-microsoft-com:xml-diffgram-v1}hasChanges=inserted, ResidueWt=1052.63159, FASW=0.2631579, CN2=82.63158, Cona=4.263158}, {{urn:schemas-microsoft-com:xml-diffgram-v1}id=65aa4ec9-19f3-4fed-9115-26c784f1945979, {urn:schemas-microsoft-com:xml-msdata}rowOrder=78, {urn:schemas-microsoft-com:xml-diffgram-v1}hasChanges=inserted, ResidueWt=3684.21045, FASW=0.2631579, CN2=82.63158, Cona=4.263158}, {{urn:schemas-microsoft-com:xml-diffgram-v1}id=65aa4ec9-19f3-4fed-9115-26c784f1945980, {urn:schemas-microsoft-com:xml-msdata}rowOrder=79, {urn:schemas-microsoft-com:xml-diffgram-v1}hasChanges=inserted, ResidueWt=3684.21045, FASW=0.7894737, CN2=82.63158, Cona=4.263158}, {{urn:schemas-microsoft-com:xml-diffgram-v1}id=65aa4ec9-19f3-4fed-9115-26c784f1945981, {urn:schemas-microsoft-com:xml-msdata}rowOrder=80, {urn:schemas-microsoft-com:xml-diffgram-v1}hasChanges=inserted, ResidueWt=2894.73682, FASW=0.6315789, CN2=73.9473648, Cona=6.47368431}, {{urn:schemas-microsoft-com:xml-diffgram-v1}id=65aa4ec9-19f3-4fed-9115-26c784f1945982, {urn:schemas-microsoft-com:xml-msdata}rowOrder=81, {urn:schemas-microsoft-com:xml-diffgram-v1}hasChanges=inserted, ResidueWt=2894.73682, FASW=0.105263, CN2=73.9473648, Cona=6.47368431}, {{urn:schemas-microsoft-com:xml-diffgram-v1}id=65aa4ec9-19f3-4fed-9115-26c784f1945983, {urn:schemas-microsoft-com:xml-msdata}rowOrder=82, {urn:schemas-microsoft-com:xml-diffgram-v1}hasChanges=inserted, ResidueWt=2894.73682, FASW=0.105263, CN2=73.9473648, Cona=3.31578946}, {{urn:schemas-microsoft-com:xml-diffgram-v1}id=65aa4ec9-19f3-4fed-9115-26c784f1945984, {urn:schemas-microsoft-com:xml-msdata}rowOrder=83, {urn:schemas-microsoft-com:xml-diffgram-v1}hasChanges=inserted, ResidueWt=263.1579, FASW=0.105263, CN2=73.9473648, Cona=3.31578946}, {{urn:schemas-microsoft-com:xml-diffgram-v1}id=65aa4ec9-19f3-4fed-9115-26c784f1945985, {urn:schemas-microsoft-com:xml-msdata}rowOrder=84, {urn:schemas-microsoft-com:xml-diffgram-v1}hasChanges=inserted, ResidueWt=263.1579, FASW=0.105263, CN2=81.8421, Cona=3.31578946}, {{urn:schemas-microsoft-com:xml-diffgram-v1}id=65aa4ec9-19f3-4fed-9115-26c784f1945986, {urn:schemas-microsoft-com:xml-msdata}rowOrder=85, {urn:schemas-microsoft-com:xml-diffgram-v1}hasChanges=inserted, ResidueWt=1578.94739, FASW=0.157895, CN2=76.31579, Cona=6.15789461}, {{urn:schemas-microsoft-com:xml-diffgram-v1}id=65aa4ec9-19f3-4fed-9115-26c784f1945987, {urn:schemas-microsoft-com:xml-msdata}rowOrder=86, {urn:schemas-microsoft-com:xml-diffgram-v1}hasChanges=inserted, ResidueWt=4210.52637, FASW=0.157895, CN2=76.31579, Cona=6.15789461}, {{urn:schemas-microsoft-com:xml-diffgram-v1}id=65aa4ec9-19f3-4fed-9115-26c784f1945988, {urn:schemas-microsoft-com:xml-msdata}rowOrder=87, {urn:schemas-microsoft-com:xml-diffgram-v1}hasChanges=inserted, ResidueWt=4210.52637, FASW=0.157895, CN2=76.31579, Cona=3}, {{urn:schemas-microsoft-com:xml-diffgram-v1}id=65aa4ec9-19f3-4fed-9115-26c784f1945989, {urn:schemas-microsoft-com:xml-msdata}rowOrder=88, {urn:schemas-microsoft-com:xml-diffgram-v1}hasChanges=inserted, ResidueWt=4210.52637, FASW=0.684211, CN2=76.31579, Cona=3}, {{urn:schemas-microsoft-com:xml-diffgram-v1}id=65aa4ec9-19f3-4fed-9115-26c784f1945990, {urn:schemas-microsoft-com:xml-msdata}rowOrder=89, {urn:schemas-microsoft-com:xml-diffgram-v1}hasChanges=inserted, ResidueWt=4210.52637, FASW=0.684211, CN2=84.2105255, Cona=3}, {{urn:schemas-microsoft-com:xml-diffgram-v1}id=65aa4ec9-19f3-4fed-9115-26c784f1945991, {urn:schemas-microsoft-com:xml-msdata}rowOrder=90, {urn:schemas-microsoft-com:xml-diffgram-v1}hasChanges=inserted, ResidueWt=3421.05273, FASW=0.5263158, CN2=70, Cona=8.052631}, {{urn:schemas-microsoft-com:xml-diffgram-v1}id=65aa4ec9-19f3-4fed-9115-26c784f1945992, {urn:schemas-microsoft-com:xml-msdata}rowOrder=91, {urn:schemas-microsoft-com:xml-diffgram-v1}hasChanges=inserted, ResidueWt=3421.05273, FASW=0, CN2=70, Cona=8.052631}, {{urn:schemas-microsoft-com:xml-diffgram-v1}id=65aa4ec9-19f3-4fed-9115-26c784f1945993, {urn:schemas-microsoft-com:xml-msdata}rowOrder=92, {urn:schemas-microsoft-com:xml-diffgram-v1}hasChanges=inserted, ResidueWt=789.4737, FASW=0, CN2=70, Cona=8.052631}, {{urn:schemas-microsoft-com:xml-diffgram-v1}id=65aa4ec9-19f3-4fed-9115-26c784f1945994, {urn:schemas-microsoft-com:xml-msdata}rowOrder=93, {urn:schemas-microsoft-com:xml-diffgram-v1}hasChanges=inserted, ResidueWt=789.4737, FASW=0, CN2=77.89474, Cona=8.052631}, {{urn:schemas-microsoft-com:xml-diffgram-v1}id=65aa4ec9-19f3-4fed-9115-26c784f1945995, {urn:schemas-microsoft-com:xml-msdata}rowOrder=94, {urn:schemas-microsoft-com:xml-diffgram-v1}hasChanges=inserted, ResidueWt=789.4737, FASW=0, CN2=77.89474, Cona=4.894737}, {{urn:schemas-microsoft-com:xml-diffgram-v1}id=65aa4ec9-19f3-4fed-9115-26c784f1945996, {urn:schemas-microsoft-com:xml-msdata}rowOrder=95, {urn:schemas-microsoft-com:xml-diffgram-v1}hasChanges=inserted, ResidueWt=1315.78943, FASW=0.7894737, CN2=76.31579, Cona=7.736842}, {{urn:schemas-microsoft-com:xml-diffgram-v1}id=65aa4ec9-19f3-4fed-9115-26c784f1945997, {urn:schemas-microsoft-com:xml-msdata}rowOrder=96, {urn:schemas-microsoft-com:xml-diffgram-v1}hasChanges=inserted, ResidueWt=1315.78943, FASW=0.7894737, CN2=76.31579, Cona=4.57894754}, {{urn:schemas-microsoft-com:xml-diffgram-v1}id=65aa4ec9-19f3-4fed-9115-26c784f1945998, {urn:schemas-microsoft-com:xml-msdata}rowOrder=97, {urn:schemas-microsoft-com:xml-diffgram-v1}hasChanges=inserted, ResidueWt=1315.78943, FASW=0.7894737, CN2=84.2105255, Cona=4.57894754}, {{urn:schemas-microsoft-com:xml-diffgram-v1}id=65aa4ec9-19f3-4fed-9115-26c784f1945999, {urn:schemas-microsoft-com:xml-msdata}rowOrder=98, {urn:schemas-microsoft-com:xml-diffgram-v1}hasChanges=inserted, ResidueWt=3947.36841, FASW=0.7894737, CN2=84.2105255, Cona=4.57894754}, {{urn:schemas-microsoft-com:xml-diffgram-v1}id=65aa4ec9-19f3-4fed-9115-26c784f19459100, {urn:schemas-microsoft-com:xml-msdata}rowOrder=99, {urn:schemas-microsoft-com:xml-diffgram-v1}hasChanges=inserted, ResidueWt=3947.36841, FASW=0.2631579, CN2=84.2105255, Cona=4.57894754}, {{urn:schemas-microsoft-com:xml-diffgram-v1}id=65aa4ec9-19f3-4fed-9115-26c784f19459101, {urn:schemas-microsoft-com:xml-msdata}rowOrder=100, {urn:schemas-microsoft-com:xml-diffgram-v1}hasChanges=inserted, ResidueWt=4473.684, FASW=0.5263158, CN2=75.52631, Cona=8.684211}, {{urn:schemas-microsoft-com:xml-diffgram-v1}id=65aa4ec9-19f3-4fed-9115-26c784f19459102, {urn:schemas-microsoft-com:xml-msdata}rowOrder=101, {urn:schemas-microsoft-com:xml-diffgram-v1}hasChanges=inserted, ResidueWt=4473.684, FASW=0.5263158, CN2=83.42105, Cona=8.684211}, {{urn:schemas-microsoft-com:xml-diffgram-v1}id=65aa4ec9-19f3-4fed-9115-26c784f19459103, {urn:schemas-microsoft-com:xml-msdata}rowOrder=102, {urn:schemas-microsoft-com:xml-diffgram-v1}hasChanges=inserted, ResidueWt=4473.684, FASW=0, CN2=83.42105, Cona=8.684211}, {{urn:schemas-microsoft-com:xml-diffgram-v1}id=65aa4ec9-19f3-4fed-9115-26c784f19459104, {urn:schemas-microsoft-com:xml-msdata}rowOrder=103, {urn:schemas-microsoft-com:xml-diffgram-v1}hasChanges=inserted, ResidueWt=1842.10522, FASW=0, CN2=83.42105, Cona=8.684211}, {{urn:schemas-microsoft-com:xml-diffgram-v1}id=65aa4ec9-19f3-4fed-9115-26c784f19459105, {urn:schemas-microsoft-com:xml-msdata}rowOrder=104, {urn:schemas-microsoft-com:xml-diffgram-v1}hasChanges=inserted, ResidueWt=1842.10522, FASW=0, CN2=83.42105, Cona=5.52631569}, {{urn:schemas-microsoft-com:xml-diffgram-v1}id=65aa4ec9-19f3-4fed-9115-26c784f19459106, {urn:schemas-microsoft-com:xml-msdata}rowOrder=105, {urn:schemas-microsoft-com:xml-diffgram-v1}hasChanges=inserted, ResidueWt=2894.73682, FASW=0.684211, CN2=71.57895, Cona=5.21052647}, {{urn:schemas-microsoft-com:xml-diffgram-v1}id=65aa4ec9-19f3-4fed-9115-26c784f19459107, {urn:schemas-microsoft-com:xml-msdata}rowOrder=106, {urn:schemas-microsoft-com:xml-diffgram-v1}hasChanges=inserted, ResidueWt=2894.73682, FASW=0.684211, CN2=71.57895, Cona=8.368421}, {{urn:schemas-microsoft-com:xml-diffgram-v1}id=65aa4ec9-19f3-4fed-9115-26c784f19459108, {urn:schemas-microsoft-com:xml-msdata}rowOrder=107, {urn:schemas-microsoft-com:xml-diffgram-v1}hasChanges=inserted, ResidueWt=263.1579, FASW=0.684211, CN2=71.57895, Cona=8.368421}, {{urn:schemas-microsoft-com:xml-diffgram-v1}id=65aa4ec9-19f3-4fed-9115-26c784f19459109, {urn:schemas-microsoft-com:xml-msdata}rowOrder=108, {urn:schemas-microsoft-com:xml-diffgram-v1}hasChanges=inserted, ResidueWt=263.1579, FASW=0.157895, CN2=71.57895, Cona=8.368421}, {{urn:schemas-microsoft-com:xml-diffgram-v1}id=65aa4ec9-19f3-4fed-9115-26c784f19459110, {urn:schemas-microsoft-com:xml-msdata}rowOrder=109, {urn:schemas-microsoft-com:xml-diffgram-v1}hasChanges=inserted, ResidueWt=263.1579, FASW=0.157895, CN2=79.47369, Cona=8.368421}, {{urn:schemas-microsoft-com:xml-diffgram-v1}id=65aa4ec9-19f3-4fed-9115-26c784f19459111, {urn:schemas-microsoft-com:xml-msdata}rowOrder=110, {urn:schemas-microsoft-com:xml-diffgram-v1}hasChanges=inserted, ResidueWt=0, FASW=0.947368, CN2=73.1579, Cona=5.52631569}, {{urn:schemas-microsoft-com:xml-diffgram-v1}id=65aa4ec9-19f3-4fed-9115-26c784f19459112, {urn:schemas-microsoft-com:xml-msdata}rowOrder=111, {urn:schemas-microsoft-com:xml-diffgram-v1}hasChanges=inserted, ResidueWt=0, FASW=0.421053, CN2=73.1579, Cona=5.52631569}, {{urn:schemas-microsoft-com:xml-diffgram-v1}id=65aa4ec9-19f3-4fed-9115-26c784f19459113, {urn:schemas-microsoft-com:xml-msdata}rowOrder=112, {urn:schemas-microsoft-com:xml-diffgram-v1}hasChanges=inserted, ResidueWt=0, FASW=0.421053, CN2=81.0526352, Cona=5.52631569}, {{urn:schemas-microsoft-com:xml-diffgram-v1}id=65aa4ec9-19f3-4fed-9115-26c784f19459114, {urn:schemas-microsoft-com:xml-msdata}rowOrder=113, {urn:schemas-microsoft-com:xml-diffgram-v1}hasChanges=inserted, ResidueWt=0, FASW=0.421053, CN2=81.0526352, Cona=8.684211}, {{urn:schemas-microsoft-com:xml-diffgram-v1}id=65aa4ec9-19f3-4fed-9115-26c784f19459115, {urn:schemas-microsoft-com:xml-msdata}rowOrder=114, {urn:schemas-microsoft-com:xml-diffgram-v1}hasChanges=inserted, ResidueWt=2631.57886, FASW=0.421053, CN2=81.0526352, Cona=8.684211}, {{urn:schemas-microsoft-com:xml-diffgram-v1}id=65aa4ec9-19f3-4fed-9115-26c784f19459116, {urn:schemas-microsoft-com:xml-msdata}rowOrder=115, {urn:schemas-microsoft-com:xml-diffgram-v1}hasChanges=inserted, ResidueWt=2368.42114, FASW=0.947368, CN2=75.52631, Cona=6.47368431}, {{urn:schemas-microsoft-com:xml-diffgram-v1}id=65aa4ec9-19f3-4fed-9115-26c784f19459117, {urn:schemas-microsoft-com:xml-msdata}rowOrder=116, {urn:schemas-microsoft-com:xml-diffgram-v1}hasChanges=inserted, ResidueWt=2368.42114, FASW=0.421053, CN2=75.52631, Cona=6.47368431}, {{urn:schemas-microsoft-com:xml-diffgram-v1}id=65aa4ec9-19f3-4fed-9115-26c784f19459118, {urn:schemas-microsoft-com:xml-msdata}rowOrder=117, {urn:schemas-microsoft-com:xml-diffgram-v1}hasChanges=inserted, ResidueWt=2368.42114, FASW=0.421053, CN2=75.52631, Cona=3.31578946}, {{urn:schemas-microsoft-com:xml-diffgram-v1}id=65aa4ec9-19f3-4fed-9115-26c784f19459119, {urn:schemas-microsoft-com:xml-msdata}rowOrder=118, {urn:schemas-microsoft-com:xml-diffgram-v1}hasChanges=inserted, ResidueWt=2368.42114, FASW=0.421053, CN2=83.42105, Cona=3.31578946}, {{urn:schemas-microsoft-com:xml-diffgram-v1}id=65aa4ec9-19f3-4fed-9115-26c784f19459120, {urn:schemas-microsoft-com:xml-msdata}rowOrder=119, {urn:schemas-microsoft-com:xml-diffgram-v1}hasChanges=inserted, ResidueWt=5000, FASW=0.421053, CN2=83.42105, Cona=3.31578946}, {{urn:schemas-microsoft-com:xml-diffgram-v1}id=65aa4ec9-19f3-4fed-9115-26c784f19459121, {urn:schemas-microsoft-com:xml-msdata}rowOrder=120, {urn:schemas-microsoft-com:xml-diffgram-v1}hasChanges=inserted, ResidueWt=3947.36841, FASW=0.842105, CN2=85, Cona=8.052631}, {{urn:schemas-microsoft-com:xml-diffgram-v1}id=65aa4ec9-19f3-4fed-9115-26c784f19459122, {urn:schemas-microsoft-com:xml-msdata}rowOrder=121, {urn:schemas-microsoft-com:xml-diffgram-v1}hasChanges=inserted, ResidueWt=3947.36841, FASW=0.842105, CN2=85, Cona=4.894737}, {{urn:schemas-microsoft-com:xml-diffgram-v1}id=65aa4ec9-19f3-4fed-9115-26c784f19459123, {urn:schemas-microsoft-com:xml-msdata}rowOrder=122, {urn:schemas-microsoft-com:xml-diffgram-v1}hasChanges=inserted, ResidueWt=3947.36841, FASW=0.315789, CN2=85, Cona=4.894737}, {{urn:schemas-microsoft-com:xml-diffgram-v1}id=65aa4ec9-19f3-4fed-9115-26c784f19459124, {urn:schemas-microsoft-com:xml-msdata}rowOrder=123, {urn:schemas-microsoft-com:xml-diffgram-v1}hasChanges=inserted, ResidueWt=3947.36841, FASW=0.315789, CN2=77.10526, Cona=4.894737}, {{urn:schemas-microsoft-com:xml-diffgram-v1}id=65aa4ec9-19f3-4fed-9115-26c784f19459125, {urn:schemas-microsoft-com:xml-msdata}rowOrder=124, {urn:schemas-microsoft-com:xml-diffgram-v1}hasChanges=inserted, ResidueWt=1315.78943, FASW=0.315789, CN2=77.10526, Cona=4.894737}, {{urn:schemas-microsoft-com:xml-diffgram-v1}id=65aa4ec9-19f3-4fed-9115-26c784f19459126, {urn:schemas-microsoft-com:xml-msdata}rowOrder=125, {urn:schemas-microsoft-com:xml-diffgram-v1}hasChanges=inserted, ResidueWt=263.1579, FASW=0.105263, CN2=83.42105, Cona=5.84210539}, {{urn:schemas-microsoft-com:xml-diffgram-v1}id=65aa4ec9-19f3-4fed-9115-26c784f19459127, {urn:schemas-microsoft-com:xml-msdata}rowOrder=126, {urn:schemas-microsoft-com:xml-diffgram-v1}hasChanges=inserted, ResidueWt=263.1579, FASW=0.105263, CN2=75.52631, Cona=5.84210539}, {{urn:schemas-microsoft-com:xml-diffgram-v1}id=65aa4ec9-19f3-4fed-9115-26c784f19459128, {urn:schemas-microsoft-com:xml-msdata}rowOrder=127, {urn:schemas-microsoft-com:xml-diffgram-v1}hasChanges=inserted, ResidueWt=263.1579, FASW=0.105263, CN2=75.52631, Cona=9}, {{urn:schemas-microsoft-com:xml-diffgram-v1}id=65aa4ec9-19f3-4fed-9115-26c784f19459129, {urn:schemas-microsoft-com:xml-msdata}rowOrder=128, {urn:schemas-microsoft-com:xml-diffgram-v1}hasChanges=inserted, ResidueWt=263.1579, FASW=0.6315789, CN2=75.52631, Cona=9}, {{urn:schemas-microsoft-com:xml-diffgram-v1}id=65aa4ec9-19f3-4fed-9115-26c784f19459130, {urn:schemas-microsoft-com:xml-msdata}rowOrder=129, {urn:schemas-microsoft-com:xml-diffgram-v1}hasChanges=inserted, ResidueWt=2894.73682, FASW=0.6315789, CN2=75.52631, Cona=9}, {{urn:schemas-microsoft-com:xml-diffgram-v1}id=65aa4ec9-19f3-4fed-9115-26c784f19459131, {urn:schemas-microsoft-com:xml-msdata}rowOrder=130, {urn:schemas-microsoft-com:xml-diffgram-v1}hasChanges=inserted, ResidueWt=1842.10522, FASW=0.210526, CN2=73.1579, Cona=8.052631}, {{urn:schemas-microsoft-com:xml-diffgram-v1}id=65aa4ec9-19f3-4fed-9115-26c784f19459132, {urn:schemas-microsoft-com:xml-msdata}rowOrder=131, {urn:schemas-microsoft-com:xml-diffgram-v1}hasChanges=inserted, ResidueWt=1842.10522, FASW=0.210526, CN2=81.0526352, Cona=8.052631}, {{urn:schemas-microsoft-com:xml-diffgram-v1}id=65aa4ec9-19f3-4fed-9115-26c784f19459133, {urn:schemas-microsoft-com:xml-msdata}rowOrder=132, {urn:schemas-microsoft-com:xml-diffgram-v1}hasChanges=inserted, ResidueWt=1842.10522, FASW=0.210526, CN2=81.0526352, Cona=4.894737}, {{urn:schemas-microsoft-com:xml-diffgram-v1}id=65aa4ec9-19f3-4fed-9115-26c784f19459134, {urn:schemas-microsoft-com:xml-msdata}rowOrder=133, {urn:schemas-microsoft-com:xml-diffgram-v1}hasChanges=inserted, ResidueWt=4473.684, FASW=0.210526, CN2=81.0526352, Cona=4.894737}, {{urn:schemas-microsoft-com:xml-diffgram-v1}id=65aa4ec9-19f3-4fed-9115-26c784f19459135, {urn:schemas-microsoft-com:xml-msdata}rowOrder=134, {urn:schemas-microsoft-com:xml-diffgram-v1}hasChanges=inserted, ResidueWt=4473.684, FASW=0.7368421, CN2=81.0526352, Cona=4.894737}, {{urn:schemas-microsoft-com:xml-diffgram-v1}id=65aa4ec9-19f3-4fed-9115-26c784f19459136, {urn:schemas-microsoft-com:xml-msdata}rowOrder=135, {urn:schemas-microsoft-com:xml-diffgram-v1}hasChanges=inserted, ResidueWt=3157.89478, FASW=0.842105, CN2=77.10526, Cona=6.15789461}, {{urn:schemas-microsoft-com:xml-diffgram-v1}id=65aa4ec9-19f3-4fed-9115-26c784f19459137, {urn:schemas-microsoft-com:xml-msdata}rowOrder=136, {urn:schemas-microsoft-com:xml-diffgram-v1}hasChanges=inserted, ResidueWt=526.3158, FASW=0.842105, CN2=77.10526, Cona=6.15789461}, {{urn:schemas-microsoft-com:xml-diffgram-v1}id=65aa4ec9-19f3-4fed-9115-26c784f19459138, {urn:schemas-microsoft-com:xml-msdata}rowOrder=137, {urn:schemas-microsoft-com:xml-diffgram-v1}hasChanges=inserted, ResidueWt=526.3158, FASW=0.315789, CN2=77.10526, Cona=6.15789461}, {{urn:schemas-microsoft-com:xml-diffgram-v1}id=65aa4ec9-19f3-4fed-9115-26c784f19459139, {urn:schemas-microsoft-com:xml-msdata}rowOrder=138, {urn:schemas-microsoft-com:xml-diffgram-v1}hasChanges=inserted, ResidueWt=526.3158, FASW=0.315789, CN2=85, Cona=6.15789461}, {{urn:schemas-microsoft-com:xml-diffgram-v1}id=65aa4ec9-19f3-4fed-9115-26c784f19459140, {urn:schemas-microsoft-com:xml-msdata}rowOrder=139, {urn:schemas-microsoft-com:xml-diffgram-v1}hasChanges=inserted, ResidueWt=526.3158, FASW=0.315789, CN2=85, Cona=3}, {{urn:schemas-microsoft-com:xml-diffgram-v1}id=65aa4ec9-19f3-4fed-9115-26c784f19459141, {urn:schemas-microsoft-com:xml-msdata}rowOrder=140, {urn:schemas-microsoft-com:xml-diffgram-v1}hasChanges=inserted, ResidueWt=3421.05273, FASW=0.105263, CN2=84.2105255, Cona=5.21052647}, {{urn:schemas-microsoft-com:xml-diffgram-v1}id=65aa4ec9-19f3-4fed-9115-26c784f19459142, {urn:schemas-microsoft-com:xml-msdata}rowOrder=141, {urn:schemas-microsoft-com:xml-diffgram-v1}hasChanges=inserted, ResidueWt=3421.05273, FASW=0.105263, CN2=76.31579, Cona=5.21052647}, {{urn:schemas-microsoft-com:xml-diffgram-v1}id=65aa4ec9-19f3-4fed-9115-26c784f19459143, {urn:schemas-microsoft-com:xml-msdata}rowOrder=142, {urn:schemas-microsoft-com:xml-diffgram-v1}hasChanges=inserted, ResidueWt=789.4737, FASW=0.105263, CN2=76.31579, Cona=5.21052647}, {{urn:schemas-microsoft-com:xml-diffgram-v1}id=65aa4ec9-19f3-4fed-9115-26c784f19459144, {urn:schemas-microsoft-com:xml-msdata}rowOrder=143, {urn:schemas-microsoft-com:xml-diffgram-v1}hasChanges=inserted, ResidueWt=789.4737, FASW=0.105263, CN2=76.31579, Cona=8.368421}, {{urn:schemas-microsoft-com:xml-diffgram-v1}id=65aa4ec9-19f3-4fed-9115-26c784f19459145, {urn:schemas-microsoft-com:xml-msdata}rowOrder=144, {urn:schemas-microsoft-com:xml-diffgram-v1}hasChanges=inserted, ResidueWt=789.4737, FASW=0.6315789, CN2=76.31579, Cona=8.368421}, {{urn:schemas-microsoft-com:xml-diffgram-v1}id=65aa4ec9-19f3-4fed-9115-26c784f19459146, {urn:schemas-microsoft-com:xml-msdata}rowOrder=145, {urn:schemas-microsoft-com:xml-diffgram-v1}hasChanges=inserted, ResidueWt=789.4737, FASW=0.947368, CN2=77.89474, Cona=8.368421}, {{urn:schemas-microsoft-com:xml-diffgram-v1}id=65aa4ec9-19f3-4fed-9115-26c784f19459147, {urn:schemas-microsoft-com:xml-msdata}rowOrder=146, {urn:schemas-microsoft-com:xml-diffgram-v1}hasChanges=inserted, ResidueWt=789.4737, FASW=0.947368, CN2=70, Cona=8.368421}, {{urn:schemas-microsoft-com:xml-diffgram-v1}id=65aa4ec9-19f3-4fed-9115-26c784f19459148, {urn:schemas-microsoft-com:xml-msdata}rowOrder=147, {urn:schemas-microsoft-com:xml-diffgram-v1}hasChanges=inserted, ResidueWt=3421.05273, FASW=0.947368, CN2=70, Cona=8.368421}, {{urn:schemas-microsoft-com:xml-diffgram-v1}id=65aa4ec9-19f3-4fed-9115-26c784f19459149, {urn:schemas-microsoft-com:xml-msdata}rowOrder=148, {urn:schemas-microsoft-com:xml-diffgram-v1}hasChanges=inserted, ResidueWt=3421.05273, FASW=0.947368, CN2=70, Cona=5.21052647}, {{urn:schemas-microsoft-com:xml-diffgram-v1}id=65aa4ec9-19f3-4fed-9115-26c784f19459150, {urn:schemas-microsoft-com:xml-msdata}rowOrder=149, {urn:schemas-microsoft-com:xml-diffgram-v1}hasChanges=inserted, ResidueWt=3421.05273, FASW=0.421053, CN2=70, Cona=5.21052647}, {{urn:schemas-microsoft-com:xml-diffgram-v1}id=65aa4ec9-19f3-4fed-9115-26c784f19459151, {urn:schemas-microsoft-com:xml-msdata}rowOrder=150, {urn:schemas-microsoft-com:xml-diffgram-v1}hasChanges=inserted, ResidueWt=1052.63159, FASW=0.210526, CN2=74.73684, Cona=4.263158}, {{urn:schemas-microsoft-com:xml-diffgram-v1}id=65aa4ec9-19f3-4fed-9115-26c784f19459152, {urn:schemas-microsoft-com:xml-msdata}rowOrder=151, {urn:schemas-microsoft-com:xml-diffgram-v1}hasChanges=inserted, ResidueWt=1052.63159, FASW=0.7368421, CN2=74.73684, Cona=4.263158}, {{urn:schemas-microsoft-com:xml-diffgram-v1}id=65aa4ec9-19f3-4fed-9115-26c784f19459153, {urn:schemas-microsoft-com:xml-msdata}rowOrder=152, {urn:schemas-microsoft-com:xml-diffgram-v1}hasChanges=inserted, ResidueWt=1052.63159, FASW=0.7368421, CN2=82.63158, Cona=4.263158}, {{urn:schemas-microsoft-com:xml-diffgram-v1}id=65aa4ec9-19f3-4fed-9115-26c784f19459154, {urn:schemas-microsoft-com:xml-msdata}rowOrder=153, {urn:schemas-microsoft-com:xml-diffgram-v1}hasChanges=inserted, ResidueWt=1052.63159, FASW=0.7368421, CN2=82.63158, Cona=7.42105246}, {{urn:schemas-microsoft-com:xml-diffgram-v1}id=65aa4ec9-19f3-4fed-9115-26c784f19459155, {urn:schemas-microsoft-com:xml-msdata}rowOrder=154, {urn:schemas-microsoft-com:xml-diffgram-v1}hasChanges=inserted, ResidueWt=3684.21045, FASW=0.7368421, CN2=82.63158, Cona=7.42105246}, {{urn:schemas-microsoft-com:xml-diffgram-v1}id=65aa4ec9-19f3-4fed-9115-26c784f19459156, {urn:schemas-microsoft-com:xml-msdata}rowOrder=155, {urn:schemas-microsoft-com:xml-diffgram-v1}hasChanges=inserted, ResidueWt=4473.684, FASW=1, CN2=78.68421, Cona=6.47368431}, {{urn:schemas-microsoft-com:xml-diffgram-v1}id=65aa4ec9-19f3-4fed-9115-26c784f19459157, {urn:schemas-microsoft-com:xml-msdata}rowOrder=156, {urn:schemas-microsoft-com:xml-diffgram-v1}hasChanges=inserted, ResidueWt=1842.10522, FASW=1, CN2=78.68421, Cona=6.47368431}, {{urn:schemas-microsoft-com:xml-diffgram-v1}id=65aa4ec9-19f3-4fed-9115-26c784f19459158, {urn:schemas-microsoft-com:xml-msdata}rowOrder=157, {urn:schemas-microsoft-com:xml-diffgram-v1}hasChanges=inserted, ResidueWt=1842.10522, FASW=1, CN2=70.7894745, Cona=6.47368431}, {{urn:schemas-microsoft-com:xml-diffgram-v1}id=65aa4ec9-19f3-4fed-9115-26c784f19459159, {urn:schemas-microsoft-com:xml-msdata}rowOrder=158, {urn:schemas-microsoft-com:xml-diffgram-v1}hasChanges=inserted, ResidueWt=1842.10522, FASW=1, CN2=70.7894745, Cona=3.31578946}, {{urn:schemas-microsoft-com:xml-diffgram-v1}id=65aa4ec9-19f3-4fed-9115-26c784f19459160, {urn:schemas-microsoft-com:xml-msdata}rowOrder=159, {urn:schemas-microsoft-com:xml-diffgram-v1}hasChanges=inserted, ResidueWt=1842.10522, FASW=0.473684, CN2=70.7894745, Cona=3.31578946}, {{urn:schemas-microsoft-com:xml-diffgram-v1}id=65aa4ec9-19f3-4fed-9115-26c784f19459161, {urn:schemas-microsoft-com:xml-msdata}rowOrder=160, {urn:schemas-microsoft-com:xml-diffgram-v1}hasChanges=inserted, ResidueWt=5000, FASW=0.2631579, CN2=73.9473648, Cona=8.052631}, {{urn:schemas-microsoft-com:xml-diffgram-v1}id=65aa4ec9-19f3-4fed-9115-26c784f19459162, {urn:schemas-microsoft-com:xml-msdata}rowOrder=161, {urn:schemas-microsoft-com:xml-diffgram-v1}hasChanges=inserted, ResidueWt=5000, FASW=0.2631579, CN2=73.9473648, Cona=4.894737}, {{urn:schemas-microsoft-com:xml-diffgram-v1}id=65aa4ec9-19f3-4fed-9115-26c784f19459163, {urn:schemas-microsoft-com:xml-msdata}rowOrder=162, {urn:schemas-microsoft-com:xml-diffgram-v1}hasChanges=inserted, ResidueWt=5000, FASW=0.2631579, CN2=81.8421, Cona=4.894737}, {{urn:schemas-microsoft-com:xml-diffgram-v1}id=65aa4ec9-19f3-4fed-9115-26c784f19459164, {urn:schemas-microsoft-com:xml-msdata}rowOrder=163, {urn:schemas-microsoft-com:xml-diffgram-v1}hasChanges=inserted, ResidueWt=5000, FASW=0.7894737, CN2=81.8421, Cona=4.894737}, {{urn:schemas-microsoft-com:xml-diffgram-v1}id=65aa4ec9-19f3-4fed-9115-26c784f19459165, {urn:schemas-microsoft-com:xml-msdata}rowOrder=164, {urn:schemas-microsoft-com:xml-diffgram-v1}hasChanges=inserted, ResidueWt=2368.42114, FASW=0.7894737, CN2=81.8421, Cona=4.894737}, {{urn:schemas-microsoft-com:xml-diffgram-v1}id=65aa4ec9-19f3-4fed-9115-26c784f19459166, {urn:schemas-microsoft-com:xml-msdata}rowOrder=165, {urn:schemas-microsoft-com:xml-diffgram-v1}hasChanges=inserted, ResidueWt=2368.42114, FASW=0.05263158, CN2=81.0526352, Cona=4.894737}, {{urn:schemas-microsoft-com:xml-diffgram-v1}id=65aa4ec9-19f3-4fed-9115-26c784f19459167, {urn:schemas-microsoft-com:xml-msdata}rowOrder=166, {urn:schemas-microsoft-com:xml-diffgram-v1}hasChanges=inserted, ResidueWt=5000, FASW=0.05263158, CN2=81.0526352, Cona=4.894737}, {{urn:schemas-microsoft-com:xml-diffgram-v1}id=65aa4ec9-19f3-4fed-9115-26c784f19459168, {urn:schemas-microsoft-com:xml-msdata}rowOrder=167, {urn:schemas-microsoft-com:xml-diffgram-v1}hasChanges=inserted, ResidueWt=5000, FASW=0.578947, CN2=81.0526352, Cona=4.894737}, {{urn:schemas-microsoft-com:xml-diffgram-v1}id=65aa4ec9-19f3-4fed-9115-26c784f19459169, {urn:schemas-microsoft-com:xml-msdata}rowOrder=168, {urn:schemas-microsoft-com:xml-diffgram-v1}hasChanges=inserted, ResidueWt=5000, FASW=0.578947, CN2=73.1579, Cona=4.894737}, {{urn:schemas-microsoft-com:xml-diffgram-v1}id=65aa4ec9-19f3-4fed-9115-26c784f19459170, {urn:schemas-microsoft-com:xml-msdata}rowOrder=169, {urn:schemas-microsoft-com:xml-diffgram-v1}hasChanges=inserted, ResidueWt=5000, FASW=0.578947, CN2=73.1579, Cona=8.052631}, {{urn:schemas-microsoft-com:xml-diffgram-v1}id=65aa4ec9-19f3-4fed-9115-26c784f19459171, {urn:schemas-microsoft-com:xml-msdata}rowOrder=170, {urn:schemas-microsoft-com:xml-diffgram-v1}hasChanges=inserted, ResidueWt=263.1579, FASW=0.6315789, CN2=85, Cona=4.263158}, {{urn:schemas-microsoft-com:xml-diffgram-v1}id=65aa4ec9-19f3-4fed-9115-26c784f19459172, {urn:schemas-microsoft-com:xml-msdata}rowOrder=171, {urn:schemas-microsoft-com:xml-diffgram-v1}hasChanges=inserted, ResidueWt=263.1579, FASW=0.6315789, CN2=85, Cona=7.42105246}, {{urn:schemas-microsoft-com:xml-diffgram-v1}id=65aa4ec9-19f3-4fed-9115-26c784f19459173, {urn:schemas-microsoft-com:xml-msdata}rowOrder=172, {urn:schemas-microsoft-com:xml-diffgram-v1}hasChanges=inserted, ResidueWt=263.1579, FASW=0.6315789, CN2=77.10526, Cona=7.42105246}, {{urn:schemas-microsoft-com:xml-diffgram-v1}id=65aa4ec9-19f3-4fed-9115-26c784f19459174, {urn:schemas-microsoft-com:xml-msdata}rowOrder=173, {urn:schemas-microsoft-com:xml-diffgram-v1}hasChanges=inserted, ResidueWt=263.1579, FASW=0.105263, CN2=77.10526, Cona=7.42105246}, {{urn:schemas-microsoft-com:xml-diffgram-v1}id=65aa4ec9-19f3-4fed-9115-26c784f19459175, {urn:schemas-microsoft-com:xml-msdata}rowOrder=174, {urn:schemas-microsoft-com:xml-diffgram-v1}hasChanges=inserted, ResidueWt=2894.73682, FASW=0.105263, CN2=77.10526, Cona=7.42105246}, {{urn:schemas-microsoft-com:xml-diffgram-v1}id=65aa4ec9-19f3-4fed-9115-26c784f19459176, {urn:schemas-microsoft-com:xml-msdata}rowOrder=175, {urn:schemas-microsoft-com:xml-diffgram-v1}hasChanges=inserted, ResidueWt=2105.26318, FASW=0.05263158, CN2=70.7894745, Cona=4.263158}, {{urn:schemas-microsoft-com:xml-diffgram-v1}id=65aa4ec9-19f3-4fed-9115-26c784f19459177, {urn:schemas-microsoft-com:xml-msdata}rowOrder=176, {urn:schemas-microsoft-com:xml-diffgram-v1}hasChanges=inserted, ResidueWt=2105.26318, FASW=0.578947, CN2=70.7894745, Cona=4.263158}, {{urn:schemas-microsoft-com:xml-diffgram-v1}id=65aa4ec9-19f3-4fed-9115-26c784f19459178, {urn:schemas-microsoft-com:xml-msdata}rowOrder=177, {urn:schemas-microsoft-com:xml-diffgram-v1}hasChanges=inserted, ResidueWt=2105.26318, FASW=0.578947, CN2=70.7894745, Cona=7.42105246}, {{urn:schemas-microsoft-com:xml-diffgram-v1}id=65aa4ec9-19f3-4fed-9115-26c784f19459179, {urn:schemas-microsoft-com:xml-msdata}rowOrder=178, {urn:schemas-microsoft-com:xml-diffgram-v1}hasChanges=inserted, ResidueWt=2105.26318, FASW=0.578947, CN2=78.68421, Cona=7.42105246}, {{urn:schemas-microsoft-com:xml-diffgram-v1}id=65aa4ec9-19f3-4fed-9115-26c784f19459180, {urn:schemas-microsoft-com:xml-msdata}rowOrder=179, {urn:schemas-microsoft-com:xml-diffgram-v1}hasChanges=inserted, ResidueWt=4736.84229, FASW=0.578947, CN2=78.68421, Cona=7.42105246}, {{urn:schemas-microsoft-com:xml-diffgram-v1}id=65aa4ec9-19f3-4fed-9115-26c784f19459181, {urn:schemas-microsoft-com:xml-msdata}rowOrder=180, {urn:schemas-microsoft-com:xml-diffgram-v1}hasChanges=inserted, ResidueWt=2631.57886, FASW=0, CN2=74.73684, Cona=5.21052647}, {{urn:schemas-microsoft-com:xml-diffgram-v1}id=65aa4ec9-19f3-4fed-9115-26c784f19459182, {urn:schemas-microsoft-com:xml-msdata}rowOrder=181, {urn:schemas-microsoft-com:xml-diffgram-v1}hasChanges=inserted, ResidueWt=2631.57886, FASW=0, CN2=82.63158, Cona=5.21052647}, {{urn:schemas-microsoft-com:xml-diffgram-v1}id=65aa4ec9-19f3-4fed-9115-26c784f19459183, {urn:schemas-microsoft-com:xml-msdata}rowOrder=182, {urn:schemas-microsoft-com:xml-diffgram-v1}hasChanges=inserted, ResidueWt=2631.57886, FASW=0, CN2=82.63158, Cona=8.368421}, {{urn:schemas-microsoft-com:xml-diffgram-v1}id=65aa4ec9-19f3-4fed-9115-26c784f19459184, {urn:schemas-microsoft-com:xml-msdata}rowOrder=183, {urn:schemas-microsoft-com:xml-diffgram-v1}hasChanges=inserted, ResidueWt=2631.57886, FASW=0.5263158, CN2=82.63158, Cona=8.368421}, {{urn:schemas-microsoft-com:xml-diffgram-v1}id=65aa4ec9-19f3-4fed-9115-26c784f19459185, {urn:schemas-microsoft-com:xml-msdata}rowOrder=184, {urn:schemas-microsoft-com:xml-diffgram-v1}hasChanges=inserted, ResidueWt=0, FASW=0.5263158, CN2=82.63158, Cona=8.368421}, {{urn:schemas-microsoft-com:xml-diffgram-v1}id=65aa4ec9-19f3-4fed-9115-26c784f19459186, {urn:schemas-microsoft-com:xml-msdata}rowOrder=185, {urn:schemas-microsoft-com:xml-diffgram-v1}hasChanges=inserted, ResidueWt=3947.36841, FASW=0.578947, CN2=84.2105255, Cona=6.78947353}, {{urn:schemas-microsoft-com:xml-diffgram-v1}id=65aa4ec9-19f3-4fed-9115-26c784f19459187, {urn:schemas-microsoft-com:xml-msdata}rowOrder=186, {urn:schemas-microsoft-com:xml-diffgram-v1}hasChanges=inserted, ResidueWt=1315.78943, FASW=0.578947, CN2=84.2105255, Cona=6.78947353}, {{urn:schemas-microsoft-com:xml-diffgram-v1}id=65aa4ec9-19f3-4fed-9115-26c784f19459188, {urn:schemas-microsoft-com:xml-msdata}rowOrder=187, {urn:schemas-microsoft-com:xml-diffgram-v1}hasChanges=inserted, ResidueWt=1315.78943, FASW=0.578947, CN2=76.31579, Cona=6.78947353}, {{urn:schemas-microsoft-com:xml-diffgram-v1}id=65aa4ec9-19f3-4fed-9115-26c784f19459189, {urn:schemas-microsoft-com:xml-msdata}rowOrder=188, {urn:schemas-microsoft-com:xml-diffgram-v1}hasChanges=inserted, ResidueWt=1315.78943, FASW=0.05263158, CN2=76.31579, Cona=6.78947353}, {{urn:schemas-microsoft-com:xml-diffgram-v1}id=65aa4ec9-19f3-4fed-9115-26c784f19459190, {urn:schemas-microsoft-com:xml-msdata}rowOrder=189, {urn:schemas-microsoft-com:xml-diffgram-v1}hasChanges=inserted, ResidueWt=1315.78943, FASW=0.05263158, CN2=76.31579, Cona=3.631579}, {{urn:schemas-microsoft-com:xml-diffgram-v1}id=65aa4ec9-19f3-4fed-9115-26c784f19459191, {urn:schemas-microsoft-com:xml-msdata}rowOrder=190, {urn:schemas-microsoft-com:xml-diffgram-v1}hasChanges=inserted, ResidueWt=2631.57886, FASW=0.6315789, CN2=84.2105255, Cona=7.105263}, {{urn:schemas-microsoft-com:xml-diffgram-v1}id=65aa4ec9-19f3-4fed-9115-26c784f19459192, {urn:schemas-microsoft-com:xml-msdata}rowOrder=191, {urn:schemas-microsoft-com:xml-diffgram-v1}hasChanges=inserted, ResidueWt=2631.57886, FASW=0.105263, CN2=84.2105255, Cona=7.105263}, {{urn:schemas-microsoft-com:xml-diffgram-v1}id=65aa4ec9-19f3-4fed-9115-26c784f19459193, {urn:schemas-microsoft-com:xml-msdata}rowOrder=192, {urn:schemas-microsoft-com:xml-diffgram-v1}hasChanges=inserted, ResidueWt=2631.57886, FASW=0.105263, CN2=84.2105255, Cona=3.94736838}, {{urn:schemas-microsoft-com:xml-diffgram-v1}id=65aa4ec9-19f3-4fed-9115-26c784f19459194, {urn:schemas-microsoft-com:xml-msdata}rowOrder=193, {urn:schemas-microsoft-com:xml-diffgram-v1}hasChanges=inserted, ResidueWt=0, FASW=0.105263, CN2=84.2105255, Cona=3.94736838}, {{urn:schemas-microsoft-com:xml-diffgram-v1}id=65aa4ec9-19f3-4fed-9115-26c784f19459195, {urn:schemas-microsoft-com:xml-msdata}rowOrder=194, {urn:schemas-microsoft-com:xml-diffgram-v1}hasChanges=inserted, ResidueWt=0, FASW=0.105263, CN2=76.31579, Cona=3.94736838}, {{urn:schemas-microsoft-com:xml-diffgram-v1}id=65aa4ec9-19f3-4fed-9115-26c784f19459196, {urn:schemas-microsoft-com:xml-msdata}rowOrder=195, {urn:schemas-microsoft-com:xml-diffgram-v1}hasChanges=inserted, ResidueWt=2105.26318, FASW=0.7368421, CN2=73.1579, Cona=7.42105246}, {{urn:schemas-microsoft-com:xml-diffgram-v1}id=65aa4ec9-19f3-4fed-9115-26c784f19459197, {urn:schemas-microsoft-com:xml-msdata}rowOrder=196, {urn:schemas-microsoft-com:xml-diffgram-v1}hasChanges=inserted, ResidueWt=2105.26318, FASW=0.210526, CN2=73.1579, Cona=7.42105246}, {{urn:schemas-microsoft-com:xml-diffgram-v1}id=65aa4ec9-19f3-4fed-9115-26c784f19459198, {urn:schemas-microsoft-com:xml-msdata}rowOrder=197, {urn:schemas-microsoft-com:xml-diffgram-v1}hasChanges=inserted, ResidueWt=2105.26318, FASW=0.210526, CN2=81.0526352, Cona=7.42105246}, {{urn:schemas-microsoft-com:xml-diffgram-v1}id=65aa4ec9-19f3-4fed-9115-26c784f19459199, {urn:schemas-microsoft-com:xml-msdata}rowOrder=198, {urn:schemas-microsoft-com:xml-diffgram-v1}hasChanges=inserted, ResidueWt=4736.84229, FASW=0.210526, CN2=81.0526352, Cona=7.42105246}, {{urn:schemas-microsoft-com:xml-diffgram-v1}id=65aa4ec9-19f3-4fed-9115-26c784f19459200, {urn:schemas-microsoft-com:xml-msdata}rowOrder=199, {urn:schemas-microsoft-com:xml-diffgram-v1}hasChanges=inserted, ResidueWt=4736.84229, FASW=0.210526, CN2=81.0526352, Cona=4.263158}, {{urn:schemas-microsoft-com:xml-diffgram-v1}id=65aa4ec9-19f3-4fed-9115-26c784f19459201, {urn:schemas-microsoft-com:xml-msdata}rowOrder=200, {urn:schemas-microsoft-com:xml-diffgram-v1}hasChanges=inserted, ResidueWt=3947.36841, FASW=0.6315789, CN2=78.68421, Cona=8.368421}, {{urn:schemas-microsoft-com:xml-diffgram-v1}id=65aa4ec9-19f3-4fed-9115-26c784f19459202, {urn:schemas-microsoft-com:xml-msdata}rowOrder=201, {urn:schemas-microsoft-com:xml-diffgram-v1}hasChanges=inserted, ResidueWt=1315.78943, FASW=0.6315789, CN2=78.68421, Cona=8.368421}, {{urn:schemas-microsoft-com:xml-diffgram-v1}id=65aa4ec9-19f3-4fed-9115-26c784f19459203, {urn:schemas-microsoft-com:xml-msdata}rowOrder=202, {urn:schemas-microsoft-com:xml-diffgram-v1}hasChanges=inserted, ResidueWt=1315.78943, FASW=0.105263, CN2=78.68421, Cona=8.368421}, {{urn:schemas-microsoft-com:xml-diffgram-v1}id=65aa4ec9-19f3-4fed-9115-26c784f19459204, {urn:schemas-microsoft-com:xml-msdata}rowOrder=203, {urn:schemas-microsoft-com:xml-diffgram-v1}hasChanges=inserted, ResidueWt=1315.78943, FASW=0.105263, CN2=70.7894745, Cona=8.368421}, {{urn:schemas-microsoft-com:xml-diffgram-v1}id=65aa4ec9-19f3-4fed-9115-26c784f19459205, {urn:schemas-microsoft-com:xml-msdata}rowOrder=204, {urn:schemas-microsoft-com:xml-diffgram-v1}hasChanges=inserted, ResidueWt=1315.78943, FASW=0.105263, CN2=70.7894745, Cona=5.21052647}, {{urn:schemas-microsoft-com:xml-diffgram-v1}id=65aa4ec9-19f3-4fed-9115-26c784f19459206, {urn:schemas-microsoft-com:xml-msdata}rowOrder=205, {urn:schemas-microsoft-com:xml-diffgram-v1}hasChanges=inserted, ResidueWt=4736.84229, FASW=0.8947368, CN2=70.7894745, Cona=5.21052647}, {{urn:schemas-microsoft-com:xml-diffgram-v1}id=65aa4ec9-19f3-4fed-9115-26c784f19459207, {urn:schemas-microsoft-com:xml-msdata}rowOrder=206, {urn:schemas-microsoft-com:xml-diffgram-v1}hasChanges=inserted, ResidueWt=4736.84229, FASW=0.368421, CN2=70.7894745, Cona=5.21052647}, {{urn:schemas-microsoft-com:xml-diffgram-v1}id=65aa4ec9-19f3-4fed-9115-26c784f19459208, {urn:schemas-microsoft-com:xml-msdata}rowOrder=207, {urn:schemas-microsoft-com:xml-diffgram-v1}hasChanges=inserted, ResidueWt=2105.26318, FASW=0.368421, CN2=70.7894745, Cona=5.21052647}, {{urn:schemas-microsoft-com:xml-diffgram-v1}id=65aa4ec9-19f3-4fed-9115-26c784f19459209, {urn:schemas-microsoft-com:xml-msdata}rowOrder=208, {urn:schemas-microsoft-com:xml-diffgram-v1}hasChanges=inserted, ResidueWt=2105.26318, FASW=0.368421, CN2=70.7894745, Cona=8.368421}, {{urn:schemas-microsoft-com:xml-diffgram-v1}id=65aa4ec9-19f3-4fed-9115-26c784f19459210, {urn:schemas-microsoft-com:xml-msdata}rowOrder=209, {urn:schemas-microsoft-com:xml-diffgram-v1}hasChanges=inserted, ResidueWt=2105.26318, FASW=0.368421, CN2=78.68421, Cona=8.368421}, {{urn:schemas-microsoft-com:xml-diffgram-v1}id=65aa4ec9-19f3-4fed-9115-26c784f19459211, {urn:schemas-microsoft-com:xml-msdata}rowOrder=210, {urn:schemas-microsoft-com:xml-diffgram-v1}hasChanges=inserted, ResidueWt=263.1579, FASW=0.421053, CN2=71.57895, Cona=8.684211}, {{urn:schemas-microsoft-com:xml-diffgram-v1}id=65aa4ec9-19f3-4fed-9115-26c784f19459212, {urn:schemas-microsoft-com:xml-msdata}rowOrder=211, {urn:schemas-microsoft-com:xml-diffgram-v1}hasChanges=inserted, ResidueWt=263.1579, FASW=0.947368, CN2=71.57895, Cona=8.684211}, {{urn:schemas-microsoft-com:xml-diffgram-v1}id=65aa4ec9-19f3-4fed-9115-26c784f19459213, {urn:schemas-microsoft-com:xml-msdata}rowOrder=212, {urn:schemas-microsoft-com:xml-diffgram-v1}hasChanges=inserted, ResidueWt=2894.73682, FASW=0.947368, CN2=71.57895, Cona=8.684211}, {{urn:schemas-microsoft-com:xml-diffgram-v1}id=65aa4ec9-19f3-4fed-9115-26c784f19459214, {urn:schemas-microsoft-com:xml-msdata}rowOrder=213, {urn:schemas-microsoft-com:xml-diffgram-v1}hasChanges=inserted, ResidueWt=2894.73682, FASW=0.947368, CN2=71.57895, Cona=5.52631569}, {{urn:schemas-microsoft-com:xml-diffgram-v1}id=65aa4ec9-19f3-4fed-9115-26c784f19459215, {urn:schemas-microsoft-com:xml-msdata}rowOrder=214, {urn:schemas-microsoft-com:xml-diffgram-v1}hasChanges=inserted, ResidueWt=2894.73682, FASW=0.947368, CN2=79.47369, Cona=5.52631569}, {{urn:schemas-microsoft-com:xml-diffgram-v1}id=65aa4ec9-19f3-4fed-9115-26c784f19459216, {urn:schemas-microsoft-com:xml-msdata}rowOrder=215, {urn:schemas-microsoft-com:xml-diffgram-v1}hasChanges=inserted, ResidueWt=1578.94739, FASW=0.210526, CN2=73.9473648, Cona=6.78947353}, {{urn:schemas-microsoft-com:xml-diffgram-v1}id=65aa4ec9-19f3-4fed-9115-26c784f19459217, {urn:schemas-microsoft-com:xml-msdata}rowOrder=216, {urn:schemas-microsoft-com:xml-diffgram-v1}hasChanges=inserted, ResidueWt=1578.94739, FASW=0.7368421, CN2=73.9473648, Cona=6.78947353}, {{urn:schemas-microsoft-com:xml-diffgram-v1}id=65aa4ec9-19f3-4fed-9115-26c784f19459218, {urn:schemas-microsoft-com:xml-msdata}rowOrder=217, {urn:schemas-microsoft-com:xml-diffgram-v1}hasChanges=inserted, ResidueWt=4210.52637, FASW=0.7368421, CN2=73.9473648, Cona=6.78947353}, {{urn:schemas-microsoft-com:xml-diffgram-v1}id=65aa4ec9-19f3-4fed-9115-26c784f19459219, {urn:schemas-microsoft-com:xml-msdata}rowOrder=218, {urn:schemas-microsoft-com:xml-diffgram-v1}hasChanges=inserted, ResidueWt=4210.52637, FASW=0.7368421, CN2=81.8421, Cona=6.78947353}, {{urn:schemas-microsoft-com:xml-diffgram-v1}id=65aa4ec9-19f3-4fed-9115-26c784f19459220, {urn:schemas-microsoft-com:xml-msdata}rowOrder=219, {urn:schemas-microsoft-com:xml-diffgram-v1}hasChanges=inserted, ResidueWt=4210.52637, FASW=0.7368421, CN2=81.8421, Cona=3.631579}, {{urn:schemas-microsoft-com:xml-diffgram-v1}id=65aa4ec9-19f3-4fed-9115-26c784f19459221, {urn:schemas-microsoft-com:xml-msdata}rowOrder=220, {urn:schemas-microsoft-com:xml-diffgram-v1}hasChanges=inserted, ResidueWt=2631.57886, FASW=0.105263, CN2=70, Cona=8.052631}, {{urn:schemas-microsoft-com:xml-diffgram-v1}id=65aa4ec9-19f3-4fed-9115-26c784f19459222, {urn:schemas-microsoft-com:xml-msdata}rowOrder=221, {urn:schemas-microsoft-com:xml-diffgram-v1}hasChanges=inserted, ResidueWt=2631.57886, FASW=0.105263, CN2=77.89474, Cona=8.052631}, {{urn:schemas-microsoft-com:xml-diffgram-v1}id=65aa4ec9-19f3-4fed-9115-26c784f19459223, {urn:schemas-microsoft-com:xml-msdata}rowOrder=222, {urn:schemas-microsoft-com:xml-diffgram-v1}hasChanges=inserted, ResidueWt=2631.57886, FASW=0.6315789, CN2=77.89474, Cona=8.052631}, {{urn:schemas-microsoft-com:xml-diffgram-v1}id=65aa4ec9-19f3-4fed-9115-26c784f19459224, {urn:schemas-microsoft-com:xml-msdata}rowOrder=223, {urn:schemas-microsoft-com:xml-diffgram-v1}hasChanges=inserted, ResidueWt=0, FASW=0.6315789, CN2=77.89474, Cona=8.052631}, {{urn:schemas-microsoft-com:xml-diffgram-v1}id=65aa4ec9-19f3-4fed-9115-26c784f19459225, {urn:schemas-microsoft-com:xml-msdata}rowOrder=224, {urn:schemas-microsoft-com:xml-diffgram-v1}hasChanges=inserted, ResidueWt=0, FASW=0.6315789, CN2=77.89474, Cona=4.894737}, {{urn:schemas-microsoft-com:xml-diffgram-v1}id=65aa4ec9-19f3-4fed-9115-26c784f19459226, {urn:schemas-microsoft-com:xml-msdata}rowOrder=225, {urn:schemas-microsoft-com:xml-diffgram-v1}hasChanges=inserted, ResidueWt=2631.57886, FASW=0.368421, CN2=76.31579, Cona=3.631579}, {{urn:schemas-microsoft-com:xml-diffgram-v1}id=65aa4ec9-19f3-4fed-9115-26c784f19459227, {urn:schemas-microsoft-com:xml-msdata}rowOrder=226, {urn:schemas-microsoft-com:xml-diffgram-v1}hasChanges=inserted, ResidueWt=2631.57886, FASW=0.368421, CN2=84.2105255, Cona=3.631579}, {{urn:schemas-microsoft-com:xml-diffgram-v1}id=65aa4ec9-19f3-4fed-9115-26c784f19459228, {urn:schemas-microsoft-com:xml-msdata}rowOrder=227, {urn:schemas-microsoft-com:xml-diffgram-v1}hasChanges=inserted, ResidueWt=2631.57886, FASW=0.368421, CN2=84.2105255, Cona=6.78947353}, {{urn:schemas-microsoft-com:xml-diffgram-v1}id=65aa4ec9-19f3-4fed-9115-26c784f19459229, {urn:schemas-microsoft-com:xml-msdata}rowOrder=228, {urn:schemas-microsoft-com:xml-diffgram-v1}hasChanges=inserted, ResidueWt=0, FASW=0.368421, CN2=84.2105255, Cona=6.78947353}, {{urn:schemas-microsoft-com:xml-diffgram-v1}id=65aa4ec9-19f3-4fed-9115-26c784f19459230, {urn:schemas-microsoft-com:xml-msdata}rowOrder=229, {urn:schemas-microsoft-com:xml-diffgram-v1}hasChanges=inserted, ResidueWt=0, FASW=0.8947368, CN2=84.2105255, Cona=6.78947353}, {{urn:schemas-microsoft-com:xml-diffgram-v1}id=65aa4ec9-19f3-4fed-9115-26c784f19459231, {urn:schemas-microsoft-com:xml-msdata}rowOrder=230, {urn:schemas-microsoft-com:xml-diffgram-v1}hasChanges=inserted, ResidueWt=1315.78943, FASW=0.8947368, CN2=78.68421, Cona=8.368421}, {{urn:schemas-microsoft-com:xml-diffgram-v1}id=65aa4ec9-19f3-4fed-9115-26c784f19459232, {urn:schemas-microsoft-com:xml-msdata}rowOrder=231, {urn:schemas-microsoft-com:xml-diffgram-v1}hasChanges=inserted, ResidueWt=1315.78943, FASW=0.8947368, CN2=78.68421, Cona=5.21052647}, {{urn:schemas-microsoft-com:xml-diffgram-v1}id=65aa4ec9-19f3-4fed-9115-26c784f19459233, {urn:schemas-microsoft-com:xml-msdata}rowOrder=232, {urn:schemas-microsoft-com:xml-diffgram-v1}hasChanges=inserted, ResidueWt=3947.36841, FASW=0.8947368, CN2=78.68421, Cona=5.21052647}, {{urn:schemas-microsoft-com:xml-diffgram-v1}id=65aa4ec9-19f3-4fed-9115-26c784f19459234, {urn:schemas-microsoft-com:xml-msdata}rowOrder=233, {urn:schemas-microsoft-com:xml-diffgram-v1}hasChanges=inserted, ResidueWt=3947.36841, FASW=0.368421, CN2=78.68421, Cona=5.21052647}, {{urn:schemas-microsoft-com:xml-diffgram-v1}id=65aa4ec9-19f3-4fed-9115-26c784f19459235, {urn:schemas-microsoft-com:xml-msdata}rowOrder=234, {urn:schemas-microsoft-com:xml-diffgram-v1}hasChanges=inserted, ResidueWt=3947.36841, FASW=0.368421, CN2=70.7894745, Cona=5.21052647}, {{urn:schemas-microsoft-com:xml-diffgram-v1}id=65aa4ec9-19f3-4fed-9115-26c784f19459236, {urn:schemas-microsoft-com:xml-msdata}rowOrder=235, {urn:schemas-microsoft-com:xml-diffgram-v1}hasChanges=inserted, ResidueWt=2894.73682, FASW=0.7368421, CN2=83.42105, Cona=5.84210539}, {{urn:schemas-microsoft-com:xml-diffgram-v1}id=65aa4ec9-19f3-4fed-9115-26c784f19459237, {urn:schemas-microsoft-com:xml-msdata}rowOrder=236, {urn:schemas-microsoft-com:xml-diffgram-v1}hasChanges=inserted, ResidueWt=2894.73682, FASW=0.7368421, CN2=83.42105, Cona=9}, {{urn:schemas-microsoft-com:xml-diffgram-v1}id=65aa4ec9-19f3-4fed-9115-26c784f19459238, {urn:schemas-microsoft-com:xml-msdata}rowOrder=237, {urn:schemas-microsoft-com:xml-diffgram-v1}hasChanges=inserted, ResidueWt=263.1579, FASW=0.7368421, CN2=83.42105, Cona=9}, {{urn:schemas-microsoft-com:xml-diffgram-v1}id=65aa4ec9-19f3-4fed-9115-26c784f19459239, {urn:schemas-microsoft-com:xml-msdata}rowOrder=238, {urn:schemas-microsoft-com:xml-diffgram-v1}hasChanges=inserted, ResidueWt=263.1579, FASW=0.7368421, CN2=75.52631, Cona=9}, {{urn:schemas-microsoft-com:xml-diffgram-v1}id=65aa4ec9-19f3-4fed-9115-26c784f19459240, {urn:schemas-microsoft-com:xml-msdata}rowOrder=239, {urn:schemas-microsoft-com:xml-diffgram-v1}hasChanges=inserted, ResidueWt=263.1579, FASW=0.210526, CN2=75.52631, Cona=9}, {{urn:schemas-microsoft-com:xml-diffgram-v1}id=65aa4ec9-19f3-4fed-9115-26c784f19459241, {urn:schemas-microsoft-com:xml-msdata}rowOrder=240, {urn:schemas-microsoft-com:xml-diffgram-v1}hasChanges=inserted, ResidueWt=0, FASW=0.8947368, CN2=83.42105, Cona=7.736842}, {{urn:schemas-microsoft-com:xml-diffgram-v1}id=65aa4ec9-19f3-4fed-9115-26c784f19459242, {urn:schemas-microsoft-com:xml-msdata}rowOrder=241, {urn:schemas-microsoft-com:xml-diffgram-v1}hasChanges=inserted, ResidueWt=0, FASW=0.8947368, CN2=75.52631, Cona=7.736842}, {{urn:schemas-microsoft-com:xml-diffgram-v1}id=65aa4ec9-19f3-4fed-9115-26c784f19459243, {urn:schemas-microsoft-com:xml-msdata}rowOrder=242, {urn:schemas-microsoft-com:xml-diffgram-v1}hasChanges=inserted, ResidueWt=0, FASW=0.368421, CN2=75.52631, Cona=7.736842}, {{urn:schemas-microsoft-com:xml-diffgram-v1}id=65aa4ec9-19f3-4fed-9115-26c784f19459244, {urn:schemas-microsoft-com:xml-msdata}rowOrder=243, {urn:schemas-microsoft-com:xml-diffgram-v1}hasChanges=inserted, ResidueWt=0, FASW=0.368421, CN2=75.52631, Cona=4.57894754}, {{urn:schemas-microsoft-com:xml-diffgram-v1}id=65aa4ec9-19f3-4fed-9115-26c784f19459245, {urn:schemas-microsoft-com:xml-msdata}rowOrder=244, {urn:schemas-microsoft-com:xml-diffgram-v1}hasChanges=inserted, ResidueWt=2631.57886, FASW=0.368421, CN2=75.52631, Cona=4.57894754}, {{urn:schemas-microsoft-com:xml-diffgram-v1}id=65aa4ec9-19f3-4fed-9115-26c784f19459246, {urn:schemas-microsoft-com:xml-msdata}rowOrder=245, {urn:schemas-microsoft-com:xml-diffgram-v1}hasChanges=inserted, ResidueWt=3157.89478, FASW=0.8947368, CN2=76.31579, Cona=3}, {{urn:schemas-microsoft-com:xml-diffgram-v1}id=65aa4ec9-19f3-4fed-9115-26c784f19459247, {urn:schemas-microsoft-com:xml-msdata}rowOrder=246, {urn:schemas-microsoft-com:xml-diffgram-v1}hasChanges=inserted, ResidueWt=3157.89478, FASW=0.368421, CN2=76.31579, Cona=3}, {{urn:schemas-microsoft-com:xml-diffgram-v1}id=65aa4ec9-19f3-4fed-9115-26c784f19459248, {urn:schemas-microsoft-com:xml-msdata}rowOrder=247, {urn:schemas-microsoft-com:xml-diffgram-v1}hasChanges=inserted, ResidueWt=3157.89478, FASW=0.368421, CN2=84.2105255, Cona=3}, {{urn:schemas-microsoft-com:xml-diffgram-v1}id=65aa4ec9-19f3-4fed-9115-26c784f19459249, {urn:schemas-microsoft-com:xml-msdata}rowOrder=248, {urn:schemas-microsoft-com:xml-diffgram-v1}hasChanges=inserted, ResidueWt=526.3158, FASW=0.368421, CN2=84.2105255, Cona=3}, {{urn:schemas-microsoft-com:xml-diffgram-v1}id=65aa4ec9-19f3-4fed-9115-26c784f19459250, {urn:schemas-microsoft-com:xml-msdata}rowOrder=249, {urn:schemas-microsoft-com:xml-diffgram-v1}hasChanges=inserted, ResidueWt=526.3158, FASW=0.368421, CN2=84.2105255, Cona=6.15789461}]]}
    Parameters:
      {Name=ResidueWt, Path=Field.SurfaceOrganicMatter.InitialResidueMass, LowerBound=0, UpperBound=5000}
      {Name=FASW, Path=Field.Soil.InitialWater.FractionFull, LowerBound=0, UpperBound=1}
      {Name=CN2, Path=Field.Soil.SoilWater.CN2Bare, LowerBound=70, UpperBound=85}
      {Name=Cona, Path=Field.Soil.SoilWater.SummerCona, LowerBound=3, UpperBound=9}
    Simulation FallowUpBaseSensitivitySimulation
      Clock: StartDate=1995-07-31; EndDate=2000-12-31
      Summary SummaryFile
      Weather: FileName=%root%\Examples\WeatherFiles\Dalby.met
      SoilArbitrator
      Zone Field: Area=1; Slope=0
        Report: EventNames=[ExperimentLogic].Script.Reporting
          VariableNames:
            [Clock].Today
            [Clock].Today.Year
            Sum of [Weather].Rain from [ExperimentLogic].Script.Reseting to [ExperimentLogic].Script.Reporting as FallowRainfall
            Sum of [Soil].SoilWater.Es from [ExperimentLogic].Script.Reseting to [ExperimentLogic].Script.Reporting as FallowEvaporation
            Sum of [Soil].SoilWater.Runoff from [ExperimentLogic].Script.Reseting to [ExperimentLogic].Script.Reporting as FallowRunoff
            sum([Soil].SoilWater.SWmm) as TotalSW
            sum([Soil].SoilWater.ESW) as TotalESW
            (sum([Soil].SoilNitrogen.NH4) + sum([Soil].SoilNitrogen.NO3)) as TotalMinN
            [SurfaceOrganicMatter].Wt as FinalResidueWt
            [SurfaceOrganicMatter].Cover as FinalResidueCover
        Fertiliser
        Soil: ASCOrder=Vertosol; ASCSubOrder=Black; SoilType=Clay; Site=Norwin; NearestTown=Norwin; Region=Darling Downs and Granite Belt; State=Queensland; Country=Australia; NaturalVegetation=Qld. Bluegrass, possible Qld. Blue gum; ApsoilNumber=900; Latitude=-27.581836; Longitude=151.320206; LocationAccuracy=+/- 20m
          DataSource=CSIRO Sustainable Ecosystems, Toowoomba; Characteriesd as part of the GRDC funded project"Doing it better, doing it smarter, managing soil water in Australian agriculture' 2011
          Comments=OC, CLL for all crops estimated-based on Bongeen Mywybilla Soil No1
          Water
            Thickness  BD       AirDry    LL15      DUL       SAT       KS
            150        1.01056  0.13025   0.2605    0.521     0.588655  20
            150        1.07146  0.198689  0.248362  0.496723  0.565677  20
            300        1.09394  0.28      0.28      0.488438  0.557193  20
            300        1.15861  0.28      0.28      0.480297  0.532787  20
            300        1.17301  0.28      0.28      0.471584  0.527354  20
            300        1.16287  0.28      0.28      0.457071  0.53118   20
            300        1.1875   0.28      0.28      0.452332  0.521888  20
            SoilCrop WheatSoil: LL=[0.261, 0.248, 0.28, 0.306, 0.36, 0.392, 0.446]; KL=[0.06, 0.06, 0.06, 0.04, 0.04, 0.02, 0.01]; XF=[1, 1, 1, 1, 1, 1, 1]
          SoilWater: SummerDate=1-Nov; SummerU=5; SummerCona=5; WinterDate=1-Apr; WinterU=5; WinterCona=5; DiffusConst=40; DiffusSlope=16; Salb=0.12; CN2Bare=73; CNRed=20; CNCov=0.8; max_pond=0; Thickness=[150, 150, 300, 300, 300, 300, 300]; SWCON=[0.3, 0.3, 0.3, 0.3, 0.3, 0.3, 0.3]; ResidueInterception=0
          SoilNitrogen: fom_type=[default, manure, mucuna, lablab, shemp, stable]; fract_carb=[0.2, 0.3, 0.54, 0.57, 0.45, 0]; fract_cell=[0.7, 0.3, 0.37, 0.37, 0.47, 0.1]; fract_lign=[0.1, 0.4, 0.09, 0.06, 0.08, 0.9]
          SoilOrganicMatter: RootCN=40; RootWt=1000; SoilCN=12; EnrACoeff=7.4; EnrBCoeff=0.2; OCUnits=Total
            Thickness  OC    FBiom  FInert
            150        1.2   0.04   0.4
            150        0.96  0.02   0.6
            300        0.6   0.02   0.8
            300        0.3   0.02   1
            300        0.18  0.01   1
            300        0.12  0.01   1
            300        0.12  0.01   1
          Analysis: Thickness=[150, 150, 300, 300, 300, 300, 300]; PH=[8, 8, 8, 8, 8, 8, 8]; PHUnits=Water; BoronUnits=HotWater
          InitialWater: PercentMethod=FilledFromTop; FractionFull=1; RelativeTo=WheatSoil
          Sample InitialN: NO3Units=ppm; NH4Units=ppm; SWUnits=Volumetric; OCUnits=Total; PHUnits=Water
            Thickness  NO3  NH4
            150        1    0.1
            150        1    0.1
            300        1    0.1
            300        1    0.1
            300        1    0.1
            300        1    0.1
            300        1    0.1
          CERESSoilTemperature
        SurfaceOrganicMatter: InitialResidueName=wheat_stubble; InitialResidueType=wheat; InitialResidueMass=500; InitialStandingFraction=0; InitialCPR=0; InitialCNR=100; FractionFaecesAdded=0.5
        MicroClimate: a_interception=0; b_interception=1; c_interception=0; d_interception=0; soil_albedo=0.3; SoilHeatFluxFraction=0.4; NightInterceptionFraction=0.5; ReferenceHeight=2
        SoluteManager
        Manager ExperimentLogic
          OutputDate = 30-Apr
          ResetDate = 1-Jan
          ResetWater = Yes
          ResetN = Yes
          ResetSOM = Yes
          SWDeficit = 60
```csharp
using System;
using Models.Core;
using Models.PMF;
using Models.Soils;
using Models.Utilities;
using Models.Surface;
using APSIM.Shared.Utilities;
using Models.Report;

namespace Models
{
    [Serializable]
    public class Script : Model
    {
        [Link] Clock Clock;
        [Link] SoilWater SoilWater = null;
        [Link] SoilNitrogen SoilN = null;
        [Link] SurfaceOrganicMatter SOM = null;
        [Link] Summary Summary;
        [Link] Report.Report Report;

        [Description("Date to output on:")]
        public string OutputDate {get;set;}

        [Description("Date to reset on:")]
        public string ResetDate {get;set;}

        [Description("Reset Water?")]
        public string ResetWater {get;set;}

        [Description("Reset Nitrogen?")]
        public string ResetN {get;set;}

        [Description("Reset Surface Organic Matter?")]
        public string ResetSOM {get;set;}

        [Description("SW Deficit from cover crop (mm)")]
        public double SWDeficit {get;set;}


                /// <summary>Occurs when a plant is about to be harvested.</summary>
        public event EventHandler Reseting;
                /// <summary>Occurs when a plant is about to be harvested.</summary>
        public event EventHandler Reporting;


        [EventSubscribe("DoManagement")]
        private void OnDoManagement(object sender, EventArgs e)
        {
            if (DateUtilities.WithinDates(OutputDate, Clock.Today, OutputDate))
            {
               Reporting.Invoke(this, new EventArgs());
               //Report.DoOutput();
            }

            if (DateUtilities.WithinDates(ResetDate, Clock.Today, ResetDate))
            {
                if (ResetWater == "Yes")
                {
                    Summary.WriteMessage(this, "Reset Water");
                    SoilWater.Reset();
                }
                if (ResetN == "Yes")
                {
                    Summary.WriteMessage(this, "Reset Nitrogen");
                    SoilN.Reset();
                }
                if (ResetSOM == "Yes")
                {
                    Summary.WriteMessage(this, "Reset Surface OM");
                    SOM.Reset();
                }

                double waterToRemove = SWDeficit;
                for (int i = 0; i < SoilWater.Thickness.Length; i++)
                {
                    double SWremoved = Math.Min(SoilWater.ESW[i], waterToRemove);
                    SoilWater.SWmm[i] -= SWremoved;
                    waterToRemove = waterToRemove - SWremoved;
                }

                Reseting.Invoke(this, new EventArgs());
            }
        }
    }
}
```
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