Simulations: Version=150
  Replacements
    Report DailyReport: EventNames=[Clock].DoReport
      VariableNames:
        [Clock].Today
        [Mungbean].DaysAfterSowing
        [Mungbean].Phenology.Photoperiod.DayLength
        [Mungbean].Phenology.AccumulatedTT
        [Mungbean].Leaf.DeltaLAI.Vegetative.Delta.LAR
        [Weather].MinT
        [Weather].MeanT
        [Weather].MaxT
        [Soil].Temperature.Value
        ([Weather].MaxT-[Weather].MinT) as TempDiff
        [Phenology].Photoperiod
        [Mungbean].Root.NSupply
        [Soil].SoilWater.Eo
        [Soil].SoilWater.Es
        [Irrigation].IrrigationApplied
        [Root].WaterUptake
        [Weather].VP
        [Weather].VPD
        [Leaf].Photosynthesis.VPD
        [Soil].SoilWater.Drainage
        [Soil].SoilWater.Runoff
        [Soil].SoilWater.pond
        [Mungbean].Phenology.StartFloweringDAS
        [Mungbean].Phenology.StartGrainFillingDAS
        [Mungbean].Phenology.EndGrainFillDAS
        [Mungbean].Phenology.MaturityDAS
        [Mungbean].Phenology.AccumulatedTT
        [Mungbean].Leaf.NodeNumber
        [Mungbean].Phenology.CurrentPhaseName
        [Mungbean].Phenology.Stage
        [Mungbean].Phenology.CurrentStageName
        [Mungbean].Grain.Wt*10 as Yield
        [Mungbean].Grain.Wt
        [Mungbean].Shell.Wt
        [Mungbean].Shell.N+[Mungbean].Grain.N as Pod.N
        [Mungbean].Stem.Wt
        [Mungbean].Leaf.Wt
        [Mungbean].Root.Wt
        [Mungbean].Grain.Size
        [Mungbean].Leaf.Dead.Wt
        [Mungbean].AboveGround.Wt
        [Mungbean].AboveGroundLive.Wt
        [Mungbean].Grain.Dead.Wt
        [Mungbean].Pod.Wt
        [Mungbean].Grain.HarvestIndex
        [Mungbean].Grain.LiveOnlyHI
        [Mungbean].Leaf.Fw
        [Mungbean].Leaf.Fn
        [Mungbean].Grain.Number
        [Mungbean].Leaf.Area
        [Mungbean].Leaf.Photosynthesis.FT
        [Mungbean].Phenology.Photoperiod
        [Mungbean].Nodule.NFixed
        [Mungbean].Stem.Wt+[Mungbean].Pod.Wt as StemPodWt
        [Mungbean].Stem.N
        [Mungbean].Stem.Nconc
        [Mungbean].Leaf.N
        [Mungbean].Stem.Live.N
        [Mungbean].Grain.N
        [Mungbean].Shell.N
        [Mungbean].Shell.Live.N
        [Mungbean].Leaf.Live.N
        [Mungbean].Root.Live.N
        [Mungbean].Leaf.Live.NConc
        [Mungbean].Root.Live.NConc
        [Mungbean].Grain.Nconc
        [Mungbean].Leaf.Nconc
        [Mungbean].Stem.Nconc
        [Mungbean].Pod.NConc
        [Mungbean].Shell.Nconc
        [Mungbean].AboveGround.N
        [Mungbean].Grain.LiveOnlyNHI
        [Mungbean].Grain.NHI
        [Mungbean].Leaf.Dead.N
        [Mungbean].Pod.N
        [Mungbean].Nodule.NFixed
        [Mungbean].Root.RootFrontVelocity
        [Mungbean].Root.RootDepthStressFactor
        [Mungbean].Leaf.Transpiration
        [Mungbean].Leaf.WaterDemand
        [Mungbean].Root.Depth
        [Mungbean].Leaf.CoverTotal
        [Mungbean].Leaf.CoverTotal*100 as RadiationIntercepted
        [Mungbean].Leaf.CoverDead
        [Mungbean].Leaf.LAI
        [Mungbean].Leaf.Height
        [Mungbean].Leaf.SpecificArea
        [Mungbean].Arbitrator.N.TotalPlantDemand
        [Mungbean].Arbitrator.DM.TotalFixationSupply
        [Mungbean].Arbitrator.DM.TotalPlantDemand
        [Mungbean].Leaf.DMDemand.Total
        [Mungbean].Grain.DMDemand.Total
        [Mungbean].Stem.DMDemand.Total
        [Mungbean].Shell.DMDemand.Total
        [Mungbean].Root.DMDemand.Total
        [Soil].Nutrient.MineralN[1] as SoilN_0_10cm
        ([Soil].Nutrient.MineralN[2])+(0.3*[Soil].Nutrient.MineralN[1]) as SoilN_10_30cm
        Sum([Soil].Nutrient.MineralN[3:4]) as SoilN_30_60cm
        Sum([Soil].Nutrient.MineralN[5:6]) as SoilN_60_90cm
        [Soil].Nutrient.MineralN[7] as SoilN_90_120cm
        Sum([Soil].Nutrient.MineralN[1:4]) as SoilN90cm
        Sum([Soil].Nutrient.MineralN[1:5]) as SoilN120cm
        Sum([Soil].Nutrient.MineralN[1:8]) as TotNO3150
        TotNO3150+(([Soil].Nutrient.MineralN[9]/3)) as TotNO3160
        Sum([Soil].SoilWater.PAWmm[1:2]) as SoilPAW0_30cm
        Sum([Soil].SoilWater.PAWmm[3:4]) as SoilPAW30_60cm
        Sum([Soil].SoilWater.PAWmm[5:6]) as SoilPAW60_90cm
        [Soil].SoilWater.PAWmm[7] as SoilPAW90_120cm
        [MicroClimate].PrecipitationInterception
        [MicroClimate].PetAerodynamicTerm
        [MicroClimate].PetRadiationTerm
        [Weather].Rain
        Sum([Soil].SoilWater.SWmm[1:8]) as TotSWmm150
        (TotSWmm150+(0.33*[Soil].SoilWater.SWmm[9])) as TotSWmm160
        ([Soil].SoilWater.SW[1]) as SW10
        ((0.5*[Soil].SoilWater.SW[1])+(0.5*[Soil].SoilWater.SW[2])) as SW15
        [Soil].SoilWater.SW[2] as SW20
        ((0.5*[Soil].SoilWater.SW[2])+(0.5*[Soil].SoilWater.SW[3])) as SW30
        [Soil].SoilWater.SW[3] as SW40
        [Soil].SoilWater.SW[4] as SW50
        ((0.5*[Soil].SoilWater.SW[4])+(0.5*[Soil].SoilWater.SW[5])) as SW60
        [Soil].SoilWater.SW[5] as SW70
        [Soil].SoilWater.SW[6] as SW80
        ((0.5*[Soil].SoilWater.SW[6])+(0.5*[Soil].SoilWater.SW[7])) as SW90
        [Soil].SoilWater.SW[7] as SW110
        ((0.5*[Soil].SoilWater.SW[7])+(0.5*[Soil].SoilWater.SW[8])) as SW120
        [Soil].SoilWater.SW[8] as SW130
        ((0.5*[Soil].SoilWater.SW[8])+(0.5*[Soil].SoilWater.SW[9])) as SW150
        [Mungbean].Arbitrator.DM.TotalFixationSupply
        sum([Mungbean].Arbitrator.N.Fixation) as NFixed
        [Mungbean].Arbitrator.DM.TotalPlantDemand
        [Mungbean].Stem.RetranslocationWt
        [Mungbean].Leaf.NSupply.Reallocation
        [Mungbean].Arbitrator.DM.TotalFixationSupply
        sum([Mungbean].Arbitrator.N.Fixation) as NFixed
        [Mungbean].Arbitrator.DM.TotalPlantDemand
        [Mungbean].Root.PlantWaterPotentialFactor
        [Mungbean].Leaf.NodeNumber
        [Mungbean].Leaf.BranchNumber
        [Mungbean].Leaf.Number
        [Mungbean].Leaf.ExtinctionCoefficient
        [Mungbean].Leaf.Live.Wt
        [Mungbean].Leaf.Live.StructuralWt
        [Mungbean].Leaf.Live.MetabolicWt
        [Mungbean].Leaf.Allocated.MetabolicWt
        [Mungbean].Leaf.Allocated.StructuralWt
        [Mungbean].Leaf.Total.StructuralN
        [Mungbean].Leaf.Live.StructuralN
        [Mungbean].Leaf.Total.StorageWt
        [Mungbean].Leaf.Total.MetabolicN
        [Mungbean].Leaf.Total.StorageN
        [Mungbean].Stem.PotentialGrowth
        [Mungbean].Leaf.Dead.StructuralWt
        [Mungbean].Leaf.Dead.MetabolicWt
        [Mungbean].Leaf.Live.N
        [Mungbean].Leaf.Live.NConc
        [Mungbean].Leaf.Dead.Wt
        [Mungbean].Leaf.Dead.N
        [Mungbean].Leaf.Dead.NConc
        [Mungbean].Leaf.SpecificArea
        [Mungbean].Leaf.SpecificAreaCanopy
        [Mungbean].Leaf.Senesced.Wt
        [Mungbean].Leaf.Transpiration
        [Mungbean].Leaf.Total.StructuralWt
        [Mungbean].Stem.Live.Wt
        [Mungbean].Stem.Senesced.Wt
        [Mungbean].Stem.Total.StructuralWt
        [Mungbean].Stem.Live.StructuralWt
        [Mungbean].Stem.Live.StructuralN
        [Mungbean].Stem.Total.StorageWt
        [Mungbean].Stem.PotentialGrowth
        [Mungbean].Leaf.MaximumNConc
        [Mungbean].Leaf.MinimumNConc
        [Mungbean].Leaf.CriticalNConc
        [Mungbean].Stem.MaximumNConc
        [Mungbean].Stem.MinimumNConc
        [Mungbean].Stem.CriticalNConc
        [Mungbean].Shell.MaximumNConc
        [Mungbean].Shell.MinimumNConc
        [Mungbean].Shell.CriticalNConc
        [Mungbean].Shell.Live.Wt
        [Mungbean].Shell.Total.StructuralWt
        [Mungbean].Shell.Live.StructuralWt
        [Mungbean].Shell.Live.StructuralN
        [Mungbean].Shell.Total.StorageWt
        [Mungbean].Shell.Total.StructuralN
        [Mungbean].Stem.Total.StructuralN
    Report HarvestReport: EventNames=[Mungbean].Harvesting
      VariableNames:
        [Clock].Today
        [Mungbean].Phenology.Stage
        [Mungbean].Phenology.CurrentStageName
        [Mungbean].AboveGround.Wt
        [Mungbean].AboveGround.N
        [Mungbean].Grain.Total.Wt*10 as Yield
        [Mungbean].Grain.NConc
        [Mungbean].Grain.Size
        [Mungbean].Grain.Number
        [Mungbean].Grain.Total.Wt
        [Mungbean].Grain.Total.N
        [Mungbean].Total.Wt
        [Mungbean].Phenology.EmergenceDAS
        [Mungbean].Phenology.StartFloweringDAS
        [Mungbean].Phenology.StartGrainFillingDAS
        [Mungbean].Phenology.StartPodDevDAS
        [Mungbean].Phenology.EndGrainFillDAS
        [Mungbean].Phenology.MaturityDAS
        [Mungbean].Leaf.NodeNumber
        [Mungbean].Leaf.Area
  DataStore
  Experiment Example Grazing
    Factors
      Permutation
        Factor Stocking Rate: Specification=[GrazeForageCrop].Script.StockingRate=0,50,100
    Simulation Example Grazing
      Memo
        Simple example simulation based in Gatton with the cultivar Jade.
      Summary summaryfile
      SoilArbitrator Soil Arbitrator
      Clock: Start=2016-10-01; End=2018-10-01
      Weather: FileName=WeatherFiles\Gatton.met
      Forages
        Parameters:
          Name                          IsLive  DigestibilityString  FractionConsumable  MinimumAmount  UseDigestibilityFromModel
          SurfaceOrganicMatter.Residue  true    0.7                  0                   100            false
          SurfaceOrganicMatter.Residue  false   0.3                  0                   0              false
          Mungbean.Leaf                 true    0.7                  1                   100            false
          Mungbean.Leaf                 false   0.3                  1                   0              false
          Mungbean.Grain                true    0.7                  1                   100            false
          Mungbean.Grain                false   0.3                  1                   0              false
          Mungbean.Root                 true    0                    0                   0              false
          Mungbean.Root                 false   0                    0                   0              false
          Mungbean.Nodule               true    0.7                  1                   100            false
          Mungbean.Nodule               false   0.3                  1                   0              false
          Mungbean.Shell                true    0.7                  1                   100            false
          Mungbean.Shell                false   0.3                  1                   0              false
          Mungbean.Stem                 true    0.7                  1                   100            false
          Mungbean.Stem                 false   0.3                  1                   0              false
      Stock: RandSeed=9999
      Manager GrazeForageCrop
        Genotype = Large Merino
        Sex = Male
        Age = 12
        Weight = 100
        Pregnant = 0
        Lactating = 0
        YoungNumber = 0
        YoungWt = 0
        StockingRate = 100
        CurrentLocation = Away
        PreGrazingDM = 1000
        MinGrazingDays = 7
        PostGrazingDM = 500
        DoNoGrazingWindow = False
        NoGrazeStart = 1-Nov
        NoGrazeEnd = 31-Jan
        SupplementName = Silage
        SupplementFirst = False
        SupplementEveryDay = 0
        SupplementOnPastureMass = 0
        TriggerPastureMass = 100000
```csharp
using Models.PMF.Interfaces;
using System.Diagnostics;
using Models.AgPasture;
using System.Linq;
using System.Collections.Generic;
using System.Collections;
using Models.Soils;
using Models.PMF;
using System.Xml.Serialization;
using APSIM.Shared.Utilities;
using Models.GrazPlan;
using Models.Utilities;
using Models.Core;
using Models;
using System;

namespace Models
{

    [Serializable]
    public class Script : Model
    {
        [Link] Clock clock;
        [Link] Stock stock;
        [Link] Supplement supplement;
        [Link] List<Zone> paddocks;
        [Link] ISummary summary;
        [Link] Simulation farm;
        [Link] List<IPlantDamage> forages = null;

        private int CurrentGroupNum = 1;    // animal group number
        private int CurrentLocationNum { get; set; }
        private string CurrentZone;

        [Separator("Stock type info, the same type of stock are brought onto the paddock at each grazing")]

        [Description("Stock: genotype (e.g. Small Merino, Angus, Friesian):")] 
        [Display(Values="GetGenotypes")]
        public string Genotype { get; set; }

        [Description("Stock: sex (Female, Male, Castrate):")] 
        public ReproductiveType Sex { get; set; }

        [Description("Stock: age (months):")] 
        public double Age { get; set; }

        [Description("Stock: weight (kg liveweight /head):")] 
        public double Weight { get; set; }

        [Description("Stock: fertility status (0 if non-pregnant or days since conception):")] 
        public int Pregnant { get; set; }

        [Description("Stock: lactation status (0 if non-lactating or days since parturition):")]
        public int Lactating { get; set; }

        [Description("Stock: number of unweaned young:")]
        public int YoungNumber { get; set; }

        [Description("Stock: weight of unweaned young:")] 
        public double YoungWt { get; set; }

        [Separator("Grazing event information")]

        [Description("Paddock stocking rate (head/ha): ")] 
        public double StockingRate { get; set; }

        [Description("Initial location of the stock (give either the paddock name or 'Away'): ")] 
        public string CurrentLocation { get; set; }

        [Description("Standing biomass at which to bring the stock into the simulation (kg DM/ha): ")] 
        public double PreGrazingDM { get; set; }

        [Description("Require > X days of grazable forage before moving stock: ")] 
        [Tooltip("To prevent stock being moved too often, require that there be a minimum number of grazing-days of forage available before moving the stock on. The forage needed is very simply set as 3% of the stock liveweight")] 
        public int MinGrazingDays { get; set; }

        [Description("Standing biomass at which to exit  stock from the simulation (kg DM/ha): ")] 
        public double PostGrazingDM { get; set; }

        [Description("Implement a no-grazing window? (tick for yes): ")] 
        public bool DoNoGrazingWindow { get; set; }

        [Description("Start of the no-grazing window (dd-MMM)")] 
        public string NoGrazeStart { get; set; }

        [Description("End of the no-grazing window (dd-MMM)")] 
        public string NoGrazeEnd { get; set; }

        [Separator("Supplementary feeding")]

        [Description("Name of the supplement to feed: ")] 
        public string SupplementName { get; set; }

        [Description("Feed the supplement first (i.e. before the new forage is available to the stock)?: ")] 
        public bool SupplementFirst { get; set; }

        [Description("Amount of supplementary feeding offered every day (kg DM /head /day): ")] 
        public double SupplementEveryDay { get; set; }

        [Description("Additional amount of supplement offered when available biomass is low (kg DM /head /day): ")] 
        public double SupplementOnPastureMass { get; set; }

        [Description("Trigger biomass for above rule (kg DM /ha): ")] 
        public double TriggerPastureMass { get; set; }

        public int NumStock { get; set; }
        public bool GrazingSeasonIsOpen { get; set; } // number of stock on the whole farm
        public double HarvestableBiomass { get; set; }
        public double HarvestableBiomassYesterday { get; set; }

        // Return a list of genotypes to the properties tab.
        public string[] GetGenotypes()
        {
            if (stock != null)
                return stock.Genotypes.Names.ToArray();
            return null;
        }

        [EventSubscribe("StartOfSimulation")]
        private void OnStartOfSimulation(object sender, EventArgs e)
        {
            CurrentZone = CurrentLocation;

            //Debugger.Break();

            summary.WriteMessage(this, "Initialising the paddock information", MessageType.Diagnostic);

            NumStock = (int)(Math.Round(StockingRate * farm.Area, 0));

            if (CurrentZone.ToLower() != "away")
            {
                BuyStock();
                stock.Move(CurrentZone);
                summary.WriteMessage(this, " The Stock have been moved to " + CurrentZone, MessageType.Diagnostic);
            }

            summary.WriteMessage(this, "     The number of animals has been rounded to " + NumStock + " from " + (StockingRate * farm.Area), MessageType.Diagnostic);
            summary.WriteMessage(this, "     The animals will begin in " + CurrentZone + " which is paddock number " + CurrentLocationNum + " in the simulation", MessageType.Diagnostic);
            summary.WriteMessage(this, "     The area of the whole farm is " + farm.Area + " ha", MessageType.Diagnostic);

        }

        [EventSubscribe("DoManagement")]
        private void OnDoManagement(object sender, EventArgs e)
        {
            GrazingSeasonIsOpen = true;
            if (DoNoGrazingWindow)
                GrazingSeasonIsOpen = !DateUtilities.WithinDates(NoGrazeStart, clock.Today, NoGrazeEnd);

            bool sellSomeStock = false;
            if (!GrazingSeasonIsOpen)
                sellSomeStock = true;

            // Calculate forage mass in the paddock
            HarvestableBiomass = 0.0;
            foreach (var forage in forages)
                foreach (var forageOrgan in forage.Organs)
                    if (forageOrgan.IsAboveGround)
                        HarvestableBiomass += forageOrgan.Live.Wt + forageOrgan.Dead.Wt;
            
            HarvestableBiomass *= 10;  // Convert to kg/ha

            if (clock.Today == clock.StartDate)
                HarvestableBiomassYesterday = HarvestableBiomass;

            double deltaHarvestableBiomass = Math.Max(0.0, HarvestableBiomass - HarvestableBiomassYesterday);

            if (HarvestableBiomass <= PostGrazingDM)
                sellSomeStock = true;

            if (CurrentZone == "Away")
                sellSomeStock = false;

            // The 0.03 is the propostion of body mass that the stock might eat
            double minFodder = Math.Max(PreGrazingDM, Math.Max(0.0, (0.03 * MinGrazingDays * NumStock * Weight) - (deltaHarvestableBiomass * MinGrazingDays))); 
            HarvestableBiomassYesterday = HarvestableBiomass;

            if (CurrentZone == "Away" && (HarvestableBiomass >= PreGrazingDM) && HarvestableBiomass >= (PostGrazingDM + minFodder) && GrazingSeasonIsOpen)
            {
                CurrentZone = paddocks[0].Name;
                CurrentLocationNum = paddocks[0].Index;
                BuyStock();
                stock.Move(CurrentZone);
                summary.WriteMessage(this, "     Buying stock ", MessageType.Diagnostic);
            }

            if (sellSomeStock)
            {
                CurrentZone = "Away";
                CurrentLocationNum = -1;
                SellStock();
                summary.WriteMessage(this, "     Selling stock ", MessageType.Diagnostic);
            }

            if (CurrentZone != "Away")
            {
                if (SupplementEveryDay > 0)
                {
                    double silageOnHand = supplement.Stores[2 - 1].Stored;
                    if (silageOnHand < SupplementEveryDay * stock.NumberAll)
                    {
                        supplement.Buy(SupplementEveryDay * 30.0 * stock.NumberAll, SupplementName);  // i.e. 1 months worth
                        summary.WriteMessage(this, "SupplementEveryDay: Buying " + SupplementName + " of total amount : " + (SupplementEveryDay * 90 * stock.NumberAll) + " kg DM", MessageType.Diagnostic);
                    }
                    supplement.Feed(SupplementName, SupplementEveryDay * stock.NumberAll, CurrentZone, SupplementFirst);
                }

                if (SupplementOnPastureMass > 0 && HarvestableBiomass <= TriggerPastureMass)
                {
                    double silageOnHand = supplement.Stores[2 - 1].Stored;
                    if (silageOnHand < SupplementOnPastureMass * stock.NumberAll)
                    {
                        supplement.Buy(SupplementOnPastureMass * 30.0 * stock.NumberAll, SupplementName);  // i.e. 1 months worth
                        summary.WriteMessage(this, "SupplementOnBiomass: Buying " + SupplementName + " of total amount : " + (SupplementOnPastureMass * 90 * stock.NumberAll) + " kg DM", MessageType.Diagnostic);
                    }
                    supplement.Feed(SupplementName, SupplementOnPastureMass * stock.NumberAll, CurrentZone, SupplementFirst);
                }
            }
        }


        public void BuyStock()
        {
            CurrentGroupNum = stock.NoGroups + 1;
            StockBuy purchase = new StockBuy();
            purchase.Genotype = Genotype;
            purchase.Number = NumStock;
            purchase.Sex = Sex;
            purchase.Age = Age;       // age in months
            purchase.Weight = Weight;  // live weight in kg
            purchase.UseTag = CurrentGroupNum + 1;
            purchase.MatedTo = purchase.Genotype;
            purchase.Pregnant = Pregnant;  // days pregnant, 0 = non pregnant, 1 = pregnant
            purchase.Lactating = Lactating;  // 0 for dry, 1 for lactating
            purchase.NumYoung = YoungNumber;
            purchase.YoungWt = YoungWt;

            stock.Buy(purchase);
        }

        public void SellStock()
        {
            int NumGroups = stock.NoGroups;

            NumGroups = stock.NoGroups;
            for (int gg = 1; gg <= NumGroups; gg++)
            {
                stock.Sell(stock.Number[gg - 1]);
            }
        }
    }
}
```
      Supplement: SpoilageTime=0
        Stores:
          Name    Stored  IsRoughage  DMContent  DMD   MEContent  CPConc  ProtDg  PConc   SConc   EEConc  ADIP2CP  AshAlk  MaxPassage
          fodder  0       true        0.85       0     0          0       0       0       0       0       0        0       0
          silage  0       true        1          0.75  12         0.18    0.8     0.0032  0.0024  0.02    0.06     0.6     0
      Zone paddock: Area=1; Slope=0; AspectAngle=0; Altitude=50
        Irrigation
        Fertiliser
        SurfaceOrganicMatter: InitialResidueName=wheat; InitialResidueType=wheat; InitialResidueMass=500; InitialStandingFraction=0; InitialCPR=0; InitialCNR=40
        Report DailyReport: EventNames=[Clock].DoReport
          VariableNames:
            [Clock].Today
            [DiagnosticsVariables].Script.AccumPlantN
            [DiagnosticsVariables].Script.AccumMineralisation
            [DiagnosticsVariables].Script.AccumDenit
            [DiagnosticsVariables].Script.AccumFert
            [DiagnosticsVariables].Script.AccumLeach
            [DiagnosticsVariables].Script.AccumDetach
            [DiagnosticsVariables].Script.DeltaSoilOMN
            [DiagnosticsVariables].Script.DeltaSurfaceOMN
            [DiagnosticsVariables].Script.DeltaSoilMineralN
            [Mungbean].Root.NSupply
            [Soil].SoilWater.Eo
            [Soil].SoilWater.Es
            [DiagnosticsVariables].Script.SWC
            [DiagnosticsVariables].Script.DUL
            [Soil].SoilWater.Drainage
            [Soil].SoilWater.Runoff
            [DiagnosticsVariables].Script.OutFlowLat
            [Soil].SoilWater.pond
            [DiagnosticsVariables].Script.AccumEO
            [DiagnosticsVariables].Script.AccumEP
            [DiagnosticsVariables].Script.AccumES
            [DiagnosticsVariables].Script.AccumDrainage
            [DiagnosticsVariables].Script.AccumRunoff
            [DiagnosticsVariables].Script.AccumRainfall
            [DiagnosticsVariables].Script.AccumIrrigation
            [DiagnosticsVariables].Script.AccumOutflowLat
            [DiagnosticsVariables].Script.SoilWaterDeficit
            [Mungbean].Grain.Live.Wt
            [Mungbean].Shell.Live.Wt
            [Mungbean].Stem.Live.Wt
            [Mungbean].Stem.Live.Wt
            [Mungbean].Grain.Live.N
            [Mungbean].Shell.Live.N
            [Mungbean].Leaf.Live.Wt
            [Mungbean].Root.Live.Wt
            [Mungbean].Leaf.Live.N
            [Mungbean].Root.Live.N
            [Mungbean].Leaf.Live.NConc
            [Mungbean].Root.Live.NConc
            [Mungbean].Root.WaterSupply
            [Mungbean].Root.WaterUptake
            [Mungbean].Leaf.Transpiration
            [Mungbean].Leaf.WaterDemand
            [Mungbean].Root.Depth
            [Mungbean].Leaf.CoverTotal
            [Mungbean].Leaf.CoverDead
            [Mungbean].Leaf.LAI
            [Mungbean].Leaf.Height
            [Mungbean].Leaf.PotentialBiomass
            [Soil].SoilWater.SWmm
            [Soil].Nutrient.NO3.kgha
            [DiagnosticsVariables].Script.SoilNitrogenContent
            [Mungbean].Arbitrator.N.TotalPlantDemand
            [MicroClimate].net_radn
            [MicroClimate].peta
            [MicroClimate].petr
            [DiagnosticsVariables].Script.FomN
            [DiagnosticsVariables].Script.HumN
            [DiagnosticsVariables].Script.BiomN
            [DiagnosticsVariables].Script.DltNMinRes
            [DiagnosticsVariables].Script.DltNMinTot
            [Mungbean].Leaf.Fw
            [Mungbean].Leaf.Fn
            [Mungbean].Phenology.CurrentPhase.Name
            [Mungbean].Phenology.Stage
            [Mungbean].Pod.Wt
            [Mungbean].Pod.N
            [Mungbean].Structure.LeafTipsAppeared
            [Mungbean].Structure.MainStemPrimordiaNo
            [Mungbean].Leaf.CohortArea[1]
            [Mungbean].Leaf.CohortArea[2]
            [Mungbean].Leaf.CohortArea[3]
            [Mungbean].Leaf.CohortArea[4]
            [Mungbean].Leaf.CohortArea[5]
            [Mungbean].Leaf.CohortArea[6]
            [Mungbean].Leaf.CohortArea[7]
            [Mungbean].Leaf.CohortArea[8]
            [Mungbean].Leaf.CohortArea[9]
            [Mungbean].Leaf.CohortArea[10]
            [Mungbean].Leaf.CohortArea[11]
            [Mungbean].Leaf.CohortArea[12]
            [Mungbean].Leaf.CohortArea[13]
            [Mungbean].Leaf.CohortArea[14]
            [Mungbean].Leaf.CohortArea[15]
            [Mungbean].Leaf.AppearedCohortNo
            [Mungbean].Leaf.DeadCohortNo
            [Mungbean].AboveGround.Wt
            [Mungbean].Phenology.Stage
            [Mungbean].Structure.MainStemPrimordiaNo
            [Mungbean].Phenology.NFF
            [MungbeanHarvestRule].Script.FinalTag
            [Mungbean].Grain.NumberFunction
            [Mungbean].Shell.PodNumber
            [Mungbean].Phenology.FN
            [Mungbean].Phenology.FN.TotalNodes
            [Mungbean].Phenology.FN.VegetativeNodes
        Manager HarvestRule
```csharp
using Models.PMF.Phen;
using APSIM.Shared.Utilities;
using System.Xml.Serialization;
using Models;
using Models.PMF;
using Models.Soils;
using System.Text;
using System.Collections.Generic;
using Models.Core;
using System;
using Models.Soils.Nutrients;

namespace Models
{
    [Serializable] 
    public class Script : Model
    {      
        [Link] private Plant Mungbean;
        [Link] private Zone zone;
        [Link(Type = LinkType.Path, Path = "[Mungbean].Phenology")]
        private Phenology phenology;
                    
        
        [EventSubscribe("StartOfSimulation")]
        private void OnSimulationCommencing(object sender, EventArgs e)
        {
        }       
        
        [EventSubscribe("DoManagement")]
        private void OnDoManagement(object sender, EventArgs e)
        {
        if (phenology.CurrentPhase.Name=="ReadyForHarvesting")
           {
           Mungbean.Harvest();
           Mungbean.EndCrop();
           }
        }
        
        [EventSubscribe("DoManagementCalculations")]
        private void OnDoManagementCalculations(object sender, EventArgs e)
        {
            
        }
    }
}
```
        Report HarvestReport: EventNames=[Soybean].Harvesting
          VariableNames:
            [Clock].Today
            [Mungbean].Phenology.Stage
            [Mungbean].Phenology.CurrentStageName
            [Mungbean].AboveGround.Wt
            [Mungbean].AboveGround.N
            [Mungbean].Grain.Total.Wt*10 as Yield
            [Mungbean].Grain.NConc
            [Mungbean].Grain.Size
            [Mungbean].Grain.Number
            [Mungbean].Grain.Total.Wt
            [Mungbean].Grain.Total.N
            [Mungbean].Total.Wt
        Plant Mungbean
        Operations
        MicroClimate: a_interception=0; b_interception=1; c_interception=0; d_interception=0; SoilHeatFluxFraction=0.4; MinimumHeightDiffForNewLayer=0; NightInterceptionFraction=0.5; ReferenceHeight=2
        Soil: SoilType=APS6Soil; LocalName=APS6Site; Site=APS6Site; NearestTown=Unknown; Region=Lawes; NaturalVegetation=Unknown; Latitude=0; Longitude=0
          WaterBalance SoilWater: SummerDate=1-Nov; SummerU=6; SummerCona=3.5; WinterDate=1-Apr; WinterU=6; WinterCona=3.5; DiffusConst=88; DiffusSlope=35.4; Salb=0.13; CN2Bare=60; CNRed=20; CNCov=0.8; DischargeWidth=0; CatchmentArea=0
            Thickness  SWCON  KLAT
            150        0.3    0
            150        0.3    0
            150        0.3    0
            150        0.3    0
            150        0.3    0
            150        0.3    0
            300        0.3    0
            300        0.3    0
            300        0.3    0
          Organic: FOMCNRatio=60
            Thickness  Carbon  SoilCNRatio  FBiom  FInert  FOM
            150        2.08    14.5         0.03   0.45    34.7129
            150        1.21    14.5         0.02   0.6     27.0344
            150        1.21    14.5         0.01   0.78    16.3972
            150        1.15    14.5         0.01   0.78    16.397
            150        1       14.5         0.01   0.9     9.945
            150        1       14.5         0.01   0.9     9.945
            300        0.8     14.5         0.01   0.99    6.032
            300        0.45    14.5         0.01   0.99    3.659
            300        0.45    14.5         0.01   0.99    2.219
          Chemical
            Thickness  NO3N  NH4N  PH
            150        10    3     7.5
            150        5     2     8
            150        3     1     8
            150        3     1     8
            150        2     0.8   8
            150        2     0.8   8
            300        1     0.8   8
            300        0.1   0.5   8
            300        0.1   0.5   8
          CERESSoilTemperature Temperature
          Nutrient
          Physical
            Thickness  BD    AirDry  LL15    DUL   SAT
            150        1.38  0.2     0.208   0.42  0.45
            150        1.34  0.273   0.2731  0.42  0.45
            150        1.35  0.286   0.2857  0.42  0.45
            150        1.35  0.286   0.286   0.42  0.45
            150        1.5   0.286   0.2863  0.4   0.43
            150        1.5   0.286   0.286   0.4   0.43
            300        1.49  0.286   0.286   0.36  0.4
            300        1.46  0.286   0.286   0.36  0.4
            300        1.46  0.286   0.286   0.36  0.4
            SoilCrop MungbeanSoil
              LL=[0.258, 0.273, 0.286, 0.286, 0.286, 0.286, 0.286, 0.286, 0.286]
              KL=[0.08, 0.08, 0.06, 0.06, 0.06, 0.04, 0.02, 0.02, 0.01]
              XF=[1, 1, 1, 1, 1, 1, 1, 1, 1]
          Sample Initial Water: SWUnits=Volumetric; OCUnits=Total; PHUnits=Water
            Thickness  NO3  NH4  SW     PH
            150        20   7    0.258  7.5
            150        5    6    0.273  7.9
            150        4    8    0.286  8.2
            150        1    5    0.286  8.2
            150        0.5  0.5  0.286  8.9
            150        0.5  0.5  0.286  8
            300        0.5  0.5  0.286  8
            300        0.1  0.1  0.286  8
            300        0.1  0.1  0.286  8
        Manager AutoIrr
          AutoIrrigationOn = True
          Crop = [Mungbean]
          FASWThreshold = 0.9
          FASWDepth = 600
          weeks = 0
          afterSowing = 0
```csharp
using Models.Interfaces;
using System;
using Models.Core;
using System.Collections.Generic;
using System.Text;
using Models.Soils;
using Models.PMF;
using Models;
using System.Xml.Serialization;
using APSIM.Shared.Utilities;
using Models.Interfaces;
namespace Models
{
    [Serializable] 
    public class Script : Model
    {
        [Link] private Zone zone;
        [Link] private Irrigation irrigation;
        [Link] private ISoilWater waterBalance;
        [Link] private IPhysical soilPhysical;
        public double FASW { get; set; }
        public double WaterDeficit  { get; set; }
    


        [Description("Crop to irrigate")]
        public IPlant Crop { get; set; }
        
        [Description("Auto irrigation on?")]
        public bool AutoIrrigationOn { get; set; }

        [Description("Threshold fraction available water (0-1)")]
        public double FASWThreshold { get; set; }

        [Description("Soil depth (mm) to which fraction available water is calculated")]
        public double FASWDepth { get; set; }

        [Description("Minimum weeks between irrigations")]
        public double weeks { get; set; }

        [Description("Minimum days after sowing for first irrigation")]
        public int afterSowing { get; set; }

        private double irrigationGap = 0;    // gap between irrigations

        /// <summary>Called at start of simulation. Performs some basic error checking. </summary>
        [EventSubscribe("StartOfSimulation")]
        private void ErrorChecking(object sender, EventArgs args)
        {
            if (Crop == null)
                throw new Exception("No crop was specified in script " + Parent.Name);
        }

        [EventSubscribe("DoManagement")]
        private void OnDoManagement(object sender, EventArgs e)
        {
            if (AutoIrrigationOn && Crop.IsAlive)
            {
                   irrigationGap += 1;                // increment gap between irrigations
                CalculateFASW();                // calc FASW and WaterDeficit
                if ((FASW < FASWThreshold) && (irrigationGap >= weeks * 7))
                {
                    irrigation.Apply(WaterDeficit, depth: 0);
                    irrigationGap = 0;            // reset
                }
            }
            else
            {
                irrigationGap = weeks * 7 - afterSowing - 1;    // allow irrigation a number of days after it becomes alive/sown
            }
        }

        // Calculate the fraction of the potential available sw
        // Calculate the deficit amount from DUL
        private void CalculateFASW()
        {
            double[] LL15 = MathUtilities.Multiply(soilPhysical.LL15, soilPhysical.Thickness);
            double[] DUL = MathUtilities.Multiply(soilPhysical.DUL, soilPhysical.Thickness);
        
            int nlayr = GetLayerIndex(FASWDepth);
            double cumdep = MathUtilities.Sum(soilPhysical.Thickness, 0, nlayr, 0.0);    // tricky function that sums up to before nlayr

            double part_layer = MathUtilities.Divide((FASWDepth - cumdep), soilPhysical.Thickness[nlayr], 0.0);

            // note that results may be strange if swdep < ll15
            double avail_sw = (MathUtilities.Sum(waterBalance.SWmm, 0, nlayr, 0.0) + part_layer * waterBalance.SWmm[nlayr])
                            - (MathUtilities.Sum(LL15, 0, nlayr, 0.0) + part_layer * LL15[nlayr]);

            double pot_avail_sw = (MathUtilities.Sum(DUL, 0, nlayr, 0.0) + part_layer * DUL[nlayr])
                                - (MathUtilities.Sum(LL15, 0, nlayr, 0.0) + part_layer * LL15[nlayr]);
            
            FASW = MathUtilities.Divide(avail_sw, pot_avail_sw, 0.0);
            WaterDeficit = MathUtilities.Constrain(pot_avail_sw - avail_sw, 0.0, 100000);
        }

        // Get index of the layer that has this depth in it 
        private int GetLayerIndex(double pointDepth)
        {
            double[] cumThickness = soilPhysical.ThicknessCumulative;
            int layerIdx = 0;
            while ((layerIdx < cumThickness.Length) && (pointDepth > cumThickness[layerIdx]))
            {
                layerIdx += 1;
            }

            return layerIdx;
        }
    }
}
```
        Manager Sow on a fixed date
          Crop = [Mungbean]
          SowDate = 24-Oct
          CultivarName = Jade
          SowingDepth = 50
          RowSpacing = 250
          Population = 30
```csharp
using APSIM.Shared.Utilities;
using Models.Utilities;
using Models.Soils;
using Models.PMF;
using Models.Core;
using System;

namespace Models
{
    [Serializable]
    public class Script : Model
    {
        [Link] Clock Clock;
        [Link] Fertiliser Fertiliser;
        [Link] Summary Summary;
        [Link] Soil Soil;
        
        [Description("Crop")]
        public IPlant Crop { get; set; }

        [Description("Sowing date (d-mmm)")]
        public string SowDate { get; set; }

        [Display(Type = DisplayType.CultivarName)]
        [Description("Cultivar to be sown")]
        public string CultivarName { get; set; }

        [Description("Sowing depth (mm)")]
        public double SowingDepth { get; set; }

        [Description("Row spacing (mm)")]
        public double RowSpacing { get; set; }

        [Description("Plant population (/m2)")]
        public double Population { get; set; }

        [EventSubscribe("DoManagement")]
        private void OnDoManagement(object sender, EventArgs e)
        {
            if (DateUtilities.WithinDates(SowDate, Clock.Today, SowDate))
            {
                Crop.Sow(population: Population, cultivar: CultivarName, depth: SowingDepth, rowSpacing: RowSpacing);    
            }
        }
    }
}
```
  Experiment Example Crop
    Factors
      Permutation
        Factor Water
          CompositeFactor Irr: Specifications=[AutoIrr].Script.AutoIrrigationOn=True
          CompositeFactor RF: Specifications=[AutoIrr].Script.AutoIrrigationOn=False
    Simulation Example Crop
      Memo
        Simple example simulation based in Gatton with the cultivar Jade.
      Summary summaryfile
      SoilArbitrator Soil Arbitrator
      Clock: Start=2016-10-01; End=2018-10-01
      Weather: FileName=WeatherFiles\Gatton.met
      Forages: same as Example Grazing.Example Grazing.Forages
      Stock: RandSeed=9999
      Manager GrazeForageCrop: same as Example Grazing.Example Grazing.GrazeForageCrop
      Supplement: same as Example Grazing.Example Grazing.Supplement
      Zone paddock: Area=1; Slope=0; AspectAngle=0; Altitude=50
        Irrigation
        Fertiliser
        SurfaceOrganicMatter: InitialResidueName=wheat; InitialResidueType=wheat; InitialResidueMass=500; InitialStandingFraction=0; InitialCPR=0; InitialCNR=40
        Report DailyReport: same as Example Grazing.Example Grazing.paddock.DailyReport
        Manager HarvestRule: same as Example Grazing.Example Grazing.paddock.HarvestRule
        Report HarvestReport: same as Example Grazing.Example Grazing.paddock.HarvestReport
        Plant Mungbean
        Operations
        MicroClimate: a_interception=0; b_interception=1; c_interception=0; d_interception=0; SoilHeatFluxFraction=0.4; MinimumHeightDiffForNewLayer=0; NightInterceptionFraction=0.5; ReferenceHeight=2
        Soil: same as Example Grazing.Example Grazing.paddock.Soil
        Manager AutoIrr
          AutoIrrigationOn = False
          Crop = [Mungbean]
          FASWThreshold = 0.9
          FASWDepth = 600
          weeks = 0
          afterSowing = 0
          script: same as in Example Grazing.Example Grazing.paddock.AutoIrr
        Manager Sow on a fixed date: same as Example Grazing.Example Grazing.paddock.Sow on a fixed date
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