Simulations
  Simulation OilPalm: Area=0; Slope=0
    WeatherFile: FileName=WeatherFiles\Popondetta.met
    Clock: StartDate=1996-03-01; EndDate=2010-09-29
    Summary
    Zone Block: Area=1; Slope=0
      Fertiliser
      SurfaceOrganicMatter SurfaceOM: PoolName=oilpalm oilpalmstem; type=oilpalm oilpalmstem; mass=24000 63000; standing_fraction=0 0; cnr=39 145; CriticalResidueWeight=2000; OptimumDecompTemp=20; MaxCumulativeEOS=20; CNRatioDecompCoeff=0.277; CNRatioDecompThreshold=25; TotalLeachRain=25; MinRainToLeach=10; CriticalMinimumOrganicC=0.004; DefaultCPRatio=0; DefaultStandingFraction=0; StandingExtinctCoeff=0.5; FractionFaecesAdded=0.5
        Pools:
          PoolName     ResidueType  Mass   CNRatio  StandingFraction
          oilpalm      oilpalm      24000  39       0
          oilpalmstem  oilpalmstem  63000  145      0
        ResidueTypes: LoadFromResource=ResidueTypes
        TillageTypes TillageTypesList
      Soil: SoilType=Higaturu Series; Site=Sangara Estate; NearestTown=Popondetta; Region=Oro Province; Latitude=0; Longitude=0
        Water
          Thickness  BD    AirDry  LL15   DUL    SAT
          100        1.22  0.127   0.38   0.48   0.53
          200        1.22  0.127   0.38   0.48   0.53
          300        1.43  0.1     0.3    0.4    0.45
          300        1.14  0.137   0.41   0.51   0.56
          300        1.15  0.135   0.406  0.506  0.556
          300        1.15  0.135   0.406  0.506  0.556
          500        1.43  0.1     0.3    0.4    0.45
          500        1.43  0.1     0.3    0.4    0.45
          500        1.43  0.1     0.3    0.4    0.45
          500        1.43  0.1     0.3    0.4    0.45
          500        1.43  0.1     0.3    0.4    0.45
          1000       1.43  0.1     0.3    0.4    0.45
          SoilCropOilPalm OilPalm: XF=[1, 1, 1, 1, 1, 1, 1, 1, 1, 0, 0, 0]
            KL=[0.06, 0.04, 0.03, 0.02, 0.02, 0.02, 0.01, 0.01, 0.01, 0, 0, 0]
        SoilWater: min_crit_temp=5; max_crit_temp=35; max_albedo=0.23; A_to_evap_fact=0.44; canopy_eos_coef=1.7; sw_top_crit=0.9; sumes1_max=100; sumes2_max=25; solute_flow_eff=[1]; solute_flux_eff=[1]; gravity_gradient=2E-05; specific_bd=2.65; hydrol_effective_depth=450; immobile_solutes=[nh4]; canopy_fact=[1, 1, 0, 0]; canopy_fact_height=[0, 600, 1800, 30000]; canopy_fact_default=0.5; act_evap_method=ritchie; irrigation_will_runoff=false; irrigation_layer=1; SummerCona=5; SummerU=5; SummerDate=1-Nov; WinterCona=5; WinterU=5; WinterDate=1-Apr; DiffusConst=88; DiffusSlope=35.4; Salb=0.18; slope=0; discharge_width=0; catchment_area=0; max_pond=0; CN2Bare=68; CNRed=20; CNCov=0.8
          Thickness  SWCON  KLAT
          100        0.7    0
          200        0.7    0
          300        0.7    0
          300        0.7    0
          300        0.7    0
          300        0.7    0
          500        0.5    0
          500        0.5    0
          500        0.5    0
          500        0.5    0
          500        0.5    0
          1000       0.5    0
          mobile_solutes=[no3, urea, cl, br, org_n, org_c_pool1, org_c_pool2, org_c_pool3]
        SoilNitrogen: fom_type=[default, manure, mucuna, lablab, shemp, stable]; fract_carb=[0.2, 0.3, 0.54, 0.57, 0.45, 0]; fract_cell=[0.7, 0.3, 0.37, 0.37, 0.47, 0.1]; fract_lign=[0.1, 0.4, 0.09, 0.06, 0.08, 0.9]; wfpsN2N2O_x=[22, 88]; wfpsN2N2O_y=[0.1, 1]
          oc=[2.34553, 0.71634, 0.497264, 0.40701, 0.406968, 0.406953, 0.403363, 0.403377, 0.403333, 0.398403, 0.398411, 0.398373]
        SoilOrganicMatter: RootCN=30; RootWt=3000; SoilCN=12; EnrACoeff=7.4; EnrBCoeff=0.2; OCUnits=Total
          Thickness  OC    FBiom  FInert
          100        2.1   0.04   0.24
          100        1.06  0.03   0.47
          100        0.65  0.015  0.77
          300        0.5   0.01   0.95
          300        0.4   0.01   0.99
          600        0.4   0.01   0.99
          500        0.4   0.01   0.99
          500        0.4   0.01   0.99
          500        0.4   0.01   0.99
          500        0.4   0.01   0.99
          500        0.4   0.01   0.99
          1000       0.4   0.01   0.99
        Analysis: PHUnits=Water; BoronUnits=HotWater
          Thickness=[100, 200, 300, 300, 300, 300, 500, 500, 500, 500, 500, 1000]
          PH=[6.3, 6.4, 6.7, 6.8, 6.8, 6.8, 6.8, 6.8, 6.8, 6.8, 6.8, 6.8]
        InitialWater Initial water: PercentMethod=EvenlyDistributed; FractionFull=1
        Sample Initial nitrogen: NO3Units=ppm; NH4Units=ppm; SWUnits=Volumetric; OCUnits=Total; PHUnits=Water
          Thickness  NO3  NH4
          100        5    0
          200        5    0
          300        1    0
          300        1    0
          300        1    0
          300        0    0
          500        0    0
          500        0    0
          500        0    0
          500        0    0
          500        0    0
          1000       0    0
      Report AnnualOutput: EventNames=[Clock].EndOfYear
        VariableNames:
          [Clock].Today
          [OilPalm].Age
          [OilPalm].LAI
          [Calculations].Script.AnnualRain
          [Calculations].Script.AnnualIrrigation
          [Calculations].Script.AnnualFronds
          [Calculations].Script.AnnualBunches
          [Calculations].Script.AnnualYield
          [Calculations].Script.AnnualBunchSize
          [Calculations].Script.AnnualUnderstoryNPP
          [Calculations].Script.AnnualUnderstoryNFixation
          [Calculations].Script.AnnualUnderstoryNUptake
          [Calculations].Script.AnnualPalmNUptake
          [Calculations].Script.AnnualRootNPP
          [Calculations].Script.AnnualStemNPP
          [Calculations].Script.AnnualFrondNPP
          [Calculations].Script.AnnualBunchNPP
          [Calculations].Script.AnnualTotalVegetativeNPP
          [Calculations].Script.AnnualTotalNInput
          [Calculations].Script.AnnualFertiliserNAdded
          [Calculations].Script.AnnualNRemoved
          [Calculations].Script.AnnualDenitrification
          [Calculations].Script.AnnualN2O
          [Calculations].Script.AnnualLeaching
      Report MonthlyOutput: EventNames=[Clock].StartOfMonth
        VariableNames:
          [Clock].Today.Year
          [Clock].Today
          [Clock].Today.Month
          [OilPalm].Age
          [SurfaceOM].surfaceom_n
          [SurfaceOM].surfaceom_wt
          [OilPalm].LAI
          [OilPalm].StemMass
          [OilPalm].UnderstoryCoverGreen
          [Calculations].Script.surfaceom_wt_oilpalmstem
          [Calculations].Script.surfaceom_wt_oilpalmunderstory
          [Calculations].Script.SoilCtpha
          [Calculations].Script.NitTot
      OilPalm: interception=0; UnderstoryCoverMax=0.4; UnderstoryLegumeFraction=1; InterceptionFraction=0; MaximumRootDepth=5000; RootDepth=3030; DltDM=19.8711; ReproductiveGrowthFraction=0.540023; UnderstoryCoverGreen=0.0469482; UnderstoryPotNUptake=[9.0366, 16.9496, 10.5507, 0, 0, 0, 0, 0, 0, 0, 0, 0]
      Irrigation
      Manager Palm Management
        sowing_date = 1996-03-01
        population = 135
        cultivar = Dami
        sowing_depth = 200
        year1N = 0.14
        year2N = 0.3
        year3N = 0.6
        year4N = 0.9
        MatureN = 1.05
        Irrigated = True
        WaterRequirementYoung = 20
        WaterRequirementMature = 40
        Plant_population = 0
```csharp
using System;
using Models.Core;
using Models.PMF;
using Models.PMF.OilPalm;
namespace Models
{
	[Serializable]
	[System.Xml.Serialization.XmlInclude(typeof(Model))]
	public class Script : Model
	{
		[Link] Clock Clock; 
		[Link] OilPalm oilPalm;
		[Link] Summary Summary;
		[Link] Fertiliser Fertiliser;
		[Link] WeatherFile WeatherFile;
		[Link] Irrigation Irrigation;
		
		[Description("Sowing date")]
		public DateTime sowing_date {get; set;}
		
		[Description("Plant population /ha")]
		public double population {get; set;}

		[Description("Cultivar")]
		[Display(DisplayType = DisplayAttribute.DisplayTypeEnum.CultivarName)]
        public string cultivar {get; set;}

		[Description("Sowing depth (mm)")]
		public double sowing_depth {get; set;}
		
		[Description("N applied in year 1 (kg/palm)")]
		public double year1N {get;set;}
		[Description("N applied in year 2 (kg/palm)")]
		public double year2N {get;set;}
		[Description("N applied in year 3 (kg/palm)")]
		public double year3N {get;set;}
		[Description("N applied in year 4 (kg/palm)")]
		public double year4N {get;set;}
		[Description("N applied to mature palms (kg/palm)")]
		public double MatureN {get;set;}
		[Description ("Are the palms irrigated? (True/False)")]
		public bool Irrigated {get; set;}
		[Description ("Weekly water requirement young palms (mm)")]
		public double WaterRequirementYoung {get; set;}
		[Description ("Weekly water requirement mature palms (mm)")]
		public double WaterRequirementMature {get; set;}		
		
		private double WeeklyRain = 0;
		private double DayCounter = 0;
		
		
		public double Plant_population {get;set;}
		
		[EventSubscribe("Commencing")]
		public void OnSimulationCommencing(object Sender, EventArgs e)
		{
		    Plant_population = 0;
		}
		
		[EventSubscribe("DoManagement")]
		private void OnDoManagement(object sender, EventArgs e)
		{	
			if (Clock.Today.Date == sowing_date)
			{
			    oilPalm.Sow(population: population / 10000, cultivar:cultivar, depth:sowing_depth);
			}
		    if (Clock.Today.Day == 1 && (Clock.Today.Month == 3 || Clock.Today.Month == 6 || Clock.Today.Month == 9))
		    {
               double Nrate = 0;
    		   if (oilPalm.Age <= 1)
                  Nrate = year1N * population / 3;
    		   else if (oilPalm.Age <= 2)
                  Nrate = year2N * population / 3;
    		   else if (oilPalm.Age <= 3)
                  Nrate = year3N * population / 3;
    		   else if (oilPalm.Age <= 4)
                  Nrate = year4N * population / 3;
               else
                  Nrate = MatureN * population / 3;

               Fertiliser.Apply(Nrate, Fertiliser.Types.NH4NO3N, 10);		    
		    }
		   DayCounter +=1;
		   WeeklyRain +=WeatherFile.Rain;
		   if (DayCounter == 7)
		   {
		      double Deficit = 0;
		      if (oilPalm.Age<=3)
		         Deficit = Math.Max(WaterRequirementYoung - WeeklyRain,0);
		      else
		         Deficit = Math.Max(WaterRequirementMature - WeeklyRain,0);
		      if (Irrigated)
		         Irrigation.Apply(amount:Deficit);
		      DayCounter = 0;
		      WeeklyRain = 0;
		   }
		}
	}
}
```
      Manager Calculations
        AnnualRain = 2165.3
        AnnualIrrigation = 356.7
        Offset = 471
        AnnualFronds = 20
        AnnualBunches = 7.46029
        AnnualYield = 23.804
        AnnualBunchSize = 23.6353
        SoilCtpha = 310.164
        surfaceom_wt_oilpalmstem = 0
        surfaceom_wt_oilpalmunderstory = 0
        OilPalmYield = 0
        TotalNO3 = 68.5031
        NitTot = 25975.9
        AnnualUnderstoryNFixation = 4.02873
        AnnualUnderstoryNPP = 436.009
        AnnualUnderstoryNUptake = 5.12747
        AnnualPalmNUptake = 255.571
        AnnualTotalVegetativeNPP = 19695.2
        AnnualPalmVegetativeNPP = 19259.2
        AnnualFrondNPP = 11083.9
        AnnualStemNPP = 2991.59
        AnnualRootNPP = 5183.65
        AnnualBunchNPP = 13706.7
        AnnualTotalNInput = 145.779
        AnnualFertiliserNAdded = 141.75
        AnnualNRemoved = 76.0753
        AnnualDenitrification = 15.5162
        AnnualN2O = 2.72592
        AnnualLeaching = 3.89602
```csharp
using System;
using Models.Core;
using Models.PMF;
using Models.PMF.OilPalm;
using Models.Soils;
using Models.SurfaceOM;

namespace Models
{ 
	[Serializable]
	[System.Xml.Serialization.XmlInclude(typeof(Model))]
	public class Script : Model
	{
		[Link] Clock Clock;
		[Link] OilPalm OilPalm;
		[Link] Soil Soil;
		[Link] SurfaceOrganicMatter SurfaceOM;
		[Link] Summary Summary;
		[Link] Fertiliser Fertiliser;
		[Link] WeatherFile WeatherFile;
		[Link] Irrigation Irrigation;
		
		public double AnnualRain {get; set;}
		public double AnnualIrrigation {get; set;}
		public double Offset {get; set;}
		public double AnnualFronds {get; set;}
		public double AnnualBunches {get; set;}
		public double AnnualYield {get; set;}
		public double AnnualBunchSize {get; set;}
		public double SoilCtpha {get; set;}
		public double surfaceom_wt_oilpalmstem {get; set;}
		public double surfaceom_wt_oilpalmunderstory {get; set;}
	    public double OilPalmYield {get; set;}
	    public double TotalNO3 {get; set;}
	    public double NitTot {get;set;}
	    public double AnnualUnderstoryNFixation {get; set;}	
	    public double AnnualUnderstoryNPP {get; set;}	
	    public double AnnualUnderstoryNUptake {get; set;}	
	    public double AnnualPalmNUptake {get; set;}
	    
	    public double AnnualTotalVegetativeNPP {get; set;}
        public double AnnualPalmVegetativeNPP {get; set;}
        public double AnnualFrondNPP {get; set;}
        public double AnnualStemNPP {get; set;}
        public double AnnualRootNPP {get; set;}
        public double AnnualBunchNPP {get; set;}
        public double AnnualTotalNInput {get; set;}
        public double AnnualFertiliserNAdded {get; set;}
        public double AnnualNRemoved {get; set;}
        public double AnnualDenitrification {get; set;}
        public double AnnualN2O {get;set;}
        public double AnnualLeaching {get; set;}
        
        [EventSubscribe("Commencing")]
		public void OnSimulationCommencing(object Sender, EventArgs e)
		{
		    AnnualRain = 0;
		    AnnualIrrigation = 0;
			Offset = 0;
			OilPalmYield = 0;
			AnnualFronds = 0;
			AnnualBunches = 0;
			AnnualBunchSize = 0;
			AnnualYield = 0;
			SoilCtpha = 0;
			surfaceom_wt_oilpalmstem = 0;
			surfaceom_wt_oilpalmunderstory = 0;	
			NitTot=0;
			TotalNO3 = 0;
			AnnualUnderstoryNFixation = 0;
			AnnualUnderstoryNPP = 0;
			AnnualUnderstoryNUptake = 0;
			AnnualPalmNUptake = 0;

            AnnualTotalVegetativeNPP = 0;
            AnnualPalmVegetativeNPP = 0;
            AnnualFrondNPP = 0;
            AnnualStemNPP = 0;
            AnnualRootNPP = 0;
            AnnualBunchNPP = 0;
            AnnualTotalNInput = 0;
			AnnualFertiliserNAdded = 0;
			AnnualNRemoved = 0;
			AnnualDenitrification = 0;
			AnnualN2O = 0;
		    AnnualLeaching = 0;	
		}
		

       [EventSubscribe("StartOfYear")]
       private void OnStartOfYear(object sender, EventArgs e)
       {
            AnnualRain = 0;
            AnnualIrrigation = 0;
	   		Offset = OilPalm.CumulativeFrondNumber;
			AnnualYield = 0;
			AnnualBunches = 0;
			AnnualBunchSize = 0;
			AnnualUnderstoryNFixation = 0;
			AnnualUnderstoryNPP = 0;
			AnnualUnderstoryNUptake = 0;
			AnnualPalmNUptake = 0;
            AnnualTotalVegetativeNPP = 0;
            AnnualPalmVegetativeNPP = 0;
            AnnualUnderstoryNPP = 0;
            AnnualFrondNPP = 0;
            AnnualStemNPP = 0;
            AnnualRootNPP = 0;
            AnnualBunchNPP = 0;
            AnnualTotalNInput = 0;
            AnnualFertiliserNAdded = 0;
            AnnualNRemoved = 0;
            AnnualDenitrification = 0;
            AnnualN2O = 0;
            AnnualLeaching = 0;
		}
		
       [EventSubscribe("DoManagementCalculations")]
       private void OnDoManagement(object sender, EventArgs e)
		{
            AnnualRain += WeatherFile.Rain;
            AnnualIrrigation += Irrigation.IrrigationApplied;
			SoilCtpha = Utility.Math.Sum(Soil.SoilNitrogen.carbon_tot) / 1000;
			surfaceom_wt_oilpalmstem = SurfaceOM.GetWeightFromPool("oilpalmstem");
			TotalNO3 = Utility.Math.Sum(Soil.SoilNitrogen.no3);
			NitTot = Utility.Math.Sum(Soil.SoilNitrogen.nit_tot);

			AnnualUnderstoryNFixation += OilPalm.UnderstoryNFixation;
			AnnualUnderstoryNPP += (OilPalm.UnderstoryDltDM * 10);
			AnnualUnderstoryNUptake += Utility.Math.Sum(OilPalm.UnderstoryNUptake);
			AnnualPalmNUptake += Utility.Math.Sum(OilPalm.NUptake);
			AnnualFronds = OilPalm.CumulativeFrondNumber - Offset;							


            AnnualTotalVegetativeNPP += (OilPalm.RootGrowth + OilPalm.StemGrowth + OilPalm.FrondGrowth + OilPalm.UnderstoryDltDM) * 10;
            AnnualPalmVegetativeNPP += (OilPalm.RootGrowth + OilPalm.StemGrowth + OilPalm.FrondGrowth) * 10;
            AnnualFrondNPP += OilPalm.FrondGrowth * 10;
            AnnualRootNPP += OilPalm.RootGrowth * 10;
            AnnualStemNPP += OilPalm.StemGrowth * 10;
            AnnualBunchNPP += OilPalm.BunchGrowth * 10;

            AnnualTotalNInput += OilPalm.UnderstoryNFixation + Fertiliser.NitrogenApplied;
            AnnualFertiliserNAdded +=Fertiliser.NitrogenApplied;
            AnnualDenitrification += Utility.Math.Sum(Soil.SoilNitrogen.dnit);
            AnnualN2O += Utility.Math.Sum(Soil.SoilNitrogen.n2o_atm);
            AnnualLeaching += Soil.SoilWater.LeachNO3;
            
		}
		
		[EventSubscribe("Harvesting")]
		private void OnHarvesting(object sender, EventArgs e)
		{
			AnnualYield += OilPalm.HarvestFFB;
			AnnualBunches += OilPalm.HarvestBunches;
			if (AnnualBunches > 0)
				AnnualBunchSize = AnnualYield * 1000 / AnnualBunches / (OilPalm.Population * 10000);
			AnnualNRemoved += OilPalm.HarvestNRemoved;
		}
	}
}
```
  DataStore
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