Simulations: Version=153
  Memo README
    **An example of optimisation using the Simplex method in CroptimizR**

    Please read the [instructions on the website](https://apsimnextgeneration.netlify.app/usage/croptimizr/). Specifically, docker must be installed.

    This example of the CroptimizR is optimising the sowing date and initial soil nitrate levels for an experiment containing 6 six fertiliser N rates.
    The initial nitrate levels were extremely low in this experiment, and the sowing date was 17th of June (Day 168).

    *NOTE: The tolerance and maximum number of iterations have been set to reduce execution time of this simple example.  The user should decrease the tolerance, and increase the number of iterations for a more realistic use of the optimiser for this example.*
  Folder Replacements
    Manager SowOnFixedDate
      Crop = [Wheat]
      SowDate = 180
      CultivarName = Hartog
      SowingDepth = 30
      RowSpacing = 250
      Population = 100
```csharp
using APSIM.Shared.Utilities;
using Models.Utilities;
using Models.Soils;
using Models.PMF;
using Models.Core;
using System;
using System.Linq;

namespace Models
{
    [Serializable]
    public class Script : Model
    {
        [Link] Clock Clock;
        [Link] Fertiliser Fertiliser;
        [Link] Summary Summary;
        [Link] Soil Soil;
        
        [Link] public IPlant Crop { get; set; }

        [Description("Sowing day of year")]
        public double SowDate { get; set; }

        [Display(Type = DisplayType.CultivarName)]
        [Description("Cultivar to be sown")]
        public string CultivarName { get; set; }

        [Description("Sowing depth (mm)")]
        public double SowingDepth { get; set; }

        [Description("Row spacing (mm)")]
        public double RowSpacing { get; set; }

        [Description("Plant population (/m2)")]
        public double Population { get; set; }

        [EventSubscribe("DoManagement")]
        private void OnDoManagement(object sender, EventArgs e)
        {
            if (Clock.Today.DayOfYear == (int)(SowDate+0.5))
            {
                Crop.Sow(population: Population, cultivar: CultivarName, depth: SowingDepth, rowSpacing: RowSpacing);    
            }
        }
    }
}
```
    Soil APS6Field: SoilType=APS6Soil; LocalName=APS6Site; Site=APS6Site; NearestTown=Unknown; Region=Lawes; NaturalVegetation=Unknown; Latitude=0; Longitude=0
      Physical
        Thickness  BD    AirDry  LL15  DUL   SAT
        150        1.38  0.1     0.2   0.38  0.43
        150        1.34  0.1     0.2   0.38  0.43
        300        1.35  0.1     0.22  0.4   0.43
        300        1.5   0.1     0.18  0.4   0.43
        300        1.49  0.1     0.14  0.39  0.42
        300        1.46  0.1     0.2   0.38  0.4
        300        1.46  0.1     0.2   0.38  0.4
        SoilCrop WheatSoil: LL=[0.2, 0.2, 0.22, 0.18, 0.14, 0.25, 0.28]; KL=[0.06, 0.05, 0.05, 0.04, 0.04, 0.06, 0.06]; XF=[1, 1, 1, 1, 1, 1, 1]
      WaterBalance SoilWater: SummerDate=1-Nov; SummerU=6; SummerCona=3.5; WinterDate=1-Apr; WinterU=6; WinterCona=3.5; DiffusConst=88; DiffusSlope=35.4; Salb=0.13; CN2Bare=60; CNRed=20; CNCov=0.8; DischargeWidth=0; CatchmentArea=0
        Thickness  SWCON  KLAT
        150        0.3    0
        150        0.3    0
        300        0.3    0
        300        0.3    0
        300        0.3    0
        300        0.3    0
        300        0.3    0
        RunoffModel: TillageCnCumWater=0; TillageCnRed=0; CumWaterSinceTillage=0
          CNReductionForCover
            LinearInterpolationFunction EffectiveCoverMultiplier
              XYPairs: X=[0, 600, 1800, 30000]; Y=[1, 1, 0, 0]
              Constant XValue: FixedValue=0
          CNReductionForTillage: tillageCnCumWater=0; tillageCnRed=0
        EvaporationModel: t=0
        LateralFlowModel
        SaturatedFlowModel
        UnsaturatedFlowModel
        WaterTableModel
      Organic: FOMCNRatio=60; CarbonUnits=Total
        Thickness  Carbon  SoilCNRatio  FBiom  FInert  FOM
        150        2.2     14.5         0.03   0.45    694.258
        150        1.6     14.5         0.02   0.6     540.689
        300        1.15    14.5         0.01   0.78    327.944
        300        1       14.5         0.01   0.9     198.908
        300        0.8     14.5         0.01   0.99    120.644
        300        0.45    14.5         0.01   0.99    73.1743
        300        0.45    14.5         0.01   0.99    44.3824
      Chemical: Thickness=[1800]; PH=[7.5]; PHUnits=Water
      Water: Thickness=[150, 150, 300, 300, 300, 300, 300]; InitialValues=[0.38, 0.38, 0.4, 0.4, 0.39, 0.38, 0.38]; FilledFromTop=true
      CERESSoilTemperature Temperature
      Nutrient
        DirectedGraphInfo={Nodes=[{Name=Inert, OutlineColour=Black}, {Name=SurfaceResidue, OutlineColour=Black}, {Name=FOMLignin, OutlineColour=Black}, {Name=FOMCellulose, OutlineColour=Black}, {Name=FOMCarbohydrate, OutlineColour=Black}, {Name=Microbial, OutlineColour=Black}, {Name=Humic, OutlineColour=Black}, {Name=Urea, OutlineColour=Black}, {Name=NO3, OutlineColour=Black}, {Name=NH4, OutlineColour=Black}, {Name=Atmosphere, OutlineColour=Black}], Arcs=[{SourceName=SurfaceResidue, DestinationName=Microbial}, {SourceName=SurfaceResidue, DestinationName=Humic}, {SourceName=FOMLignin, DestinationName=Microbial}, {SourceName=FOMLignin, DestinationName=Humic}, {SourceName=FOMCellulose, DestinationName=Microbial}, {SourceName=FOMCellulose, DestinationName=Humic}, {SourceName=FOMCarbohydrate, DestinationName=Microbial}, {SourceName=FOMCarbohydrate, DestinationName=Humic}, {SourceName=Microbial, DestinationName=Microbial}, {SourceName=Microbial, DestinationName=Humic}, {SourceName=Humic, DestinationName=Microbial}, {SourceName=Urea, DestinationName=NH4}, {SourceName=NO3, DestinationName=Atmosphere}, {SourceName=NH4, DestinationName=NO3}]}
        Memo Introduction
          This work builds upon earlier APSIM soil organic matter models such as SoilN ([probert_apsims_1998]).

          The N pools / flows simulate the nitrate content of each soil layer.  Much of the capability has been taken from implementation in the APSIM SoilN model ([probert_apsims_1998]), which was derived from approaches in CERES-Maize ([jones_ceres-maize:_1986]).
        NutrientPool Inert
          Memo
            The inert pool captures organic matter that either does not decompose, or decomposes at a rate slow enough to be of little importance to simulations.  Such an approach was also captured in the APSIM SoilN model ([probert_apsims_1998]).
          ExpressionFunction InitialCarbon
            Expression=[Soil].Organic.FInert * [Soil].Organic.Carbon * 100 * [Soil].Physical.BD * [Soil].Physical.Thickness
            Memo
              Initial C (kg/ha) is calculated as an assumed inert fraction of the measured bulk soil organic C, bulk density and layer thickness.
          ExpressionFunction InitialNitrogen: Expression=[Inert].C / [Soil].Organic.CNR
            Memo
              Initial N (kg/ha) is calculated with the assumption that the inert pool has the same C:N ratio as the bulk soil.
          ExpressionFunction InitialPhosphorus: Expression=[Inert].C / [Inert].InitialCPRatio
            Memo
              Initial N (kg/ha) is calculated with the assumption that the inert pool has the same C:N ratio as the bulk soil.
          Constant InitialCPRatio: FixedValue=100
        NutrientPool SurfaceResidue
          Memo
            This pool is used to provide the information about potential flows of Carbon and nutrients from the surface organic matter model to the soil nutrient model.  The potential daily flows of C and nutrients is provided to this pool at run time. Matter not decomposed is returned to the surface organic matter model.  Such an approach was also captured in the APSIM SoilN model ([probert_apsims_1998]). This implementation is currently used to reproduce original functionality and should be refactored at some time in the future.
          Constant InitialCarbon: FixedValue=0
          Constant InitialNitrogen: FixedValue=0
          Constant InitialPhosphorus: FixedValue=0
          CarbonFlow Decomposition: destinationNames=[Microbial, Humic]; destinationFraction=[0.9, 0.1]
            Memo
              The soil nutrient model will attempt to decompose all potentially decomposable surface organic materials.
            Constant Rate: FixedValue=1
            Constant CO2Efficiency: FixedValue=0.4
            Constant N2OFraction: FixedValue=0
        NutrientPool FOMLignin
          Memo
            The FOMLignin pool captures "lignin-like" material within fresh organic matter (FOM).  Such as approach was also captured in the APSIM SoilN model ([probert_apsims_1998]) and in CERES Maize([jones_ceres-maize:_1986]). This pool has the slowest decomposition rate of the three FOM pools.
          ExpressionFunction InitialCarbon: Expression=[Soil].Organic.FOM * 0.1 * 0.4
            Memo
              This C in this pool is initialised as a set fraction of the initial root residue mass at initialisation.  This mass is assumed to be 40% Carbon.
          ExpressionFunction InitialNitrogen: Expression=[FOMLignin].C / [Soil].Organic.FOMCNRatio
            Memo
              It is assumed that the C:N ratio of this pool is the same as the C:N of the total root residue material.
          Constant InitialPhosphorus: FixedValue=0
          CarbonFlow Decomposition: destinationNames=[Microbial, Humic]; destinationFraction=[0.9, 0.1]
            MultiplyFunction Rate
              Constant PotentialRate: FixedValue=0.0095
              CERESMineralisationTemperatureFactor TF
              CERESMineralisationWaterFactor WF
              CERESMineralisationFOMCNRFactor CNRF
            Constant CO2Efficiency: FixedValue=0.4
        NutrientPool FOMCellulose
          Memo
            The FOMCellulose pool captures "cellulose-like" material within fresh organic matter (FOM).  Such as approach was also captured in the APSIM SoilN model ([probert_apsims_1998]) and in CERES Maize([jones_ceres-maize:_1986]).
          ExpressionFunction InitialCarbon: Expression=[Soil].Organic.FOM * 0.7 * 0.4
            Memo
              This C in this pool is initialised as a set fraction of the initial root residue mass at initialisation.  This mass is assumed to be 40% Carbon.
          ExpressionFunction InitialNitrogen: Expression=[FOMCellulose].C / [Soil].Organic.FOMCNRatio
            Memo
              It is assumed that the C:N ratio of this pool is the same as the C:N of the total root residue material.
          Constant InitialPhosphorus: FixedValue=0
          CarbonFlow Decomposition: destinationNames=[Microbial, Humic]; destinationFraction=[0.9, 0.1]
            MultiplyFunction Rate
              Constant PotentialRate: FixedValue=0.05
              CERESMineralisationTemperatureFactor TF
              CERESMineralisationWaterFactor WF
              CERESMineralisationFOMCNRFactor CNRF
            Constant CO2Efficiency: FixedValue=0.4
        NutrientPool FOMCarbohydrate
          Memo
            The FOMCarbohydrate pool captures "carbohydrate-like" material within fresh organic matter (FOM).  Such as approach was also captured in the APSIM SoilN model ([probert_apsims_1998]) and in CERES Maize([jones_ceres-maize:_1986]). This pool has the fastest decomposition rate of the three FOM pools.
          ExpressionFunction InitialCarbon: Expression=[Soil].Organic.FOM * 0.2 * 0.4
            Memo
              This C in this pool is initialised as a set fraction of the initial root residue mass at initialisation.  This mass is assumed to be 40% Carbon.
          ExpressionFunction InitialNitrogen: Expression=[FOMCarbohydrate].C / [Soil].Organic.FOMCNRatio
            Memo
              It is assumed that the C:N ratio of this pool is the same as the C:N of the total root residue material.
          Constant InitialPhosphorus: FixedValue=0
          CarbonFlow Decomposition: destinationNames=[Microbial, Humic]; destinationFraction=[0.9, 0.1]
            MultiplyFunction Rate
              Constant PotentialRate: FixedValue=0.2
              CERESMineralisationTemperatureFactor TF
              CERESMineralisationWaterFactor WF
              CERESMineralisationFOMCNRFactor CNRF
            Constant CO2Efficiency: FixedValue=0.4
        NutrientPool Microbial
          Memo
            The microbial pool (formally Biom pool in APSIM SoilNitrogen) represents the more labile, soil microbial biomass and microbial products.
          ExpressionFunction InitialCarbon
            Expression=(([Soil].Organic.Carbon * 100 * [Soil].Physical.BD * [Soil].Physical.Thickness -[Inert].C) * [Soil].Organic.FBiom) / (1 + [Soil].Organic.FBiom)
            Memo
              Initial C (kg/ha) is calculated from an assumed biomass fraction of the non-inert soil organic C, bulk density and layer thickness.
          ExpressionFunction InitialNitrogen: Expression=[Microbial].C /  [CNRatio]
            Memo
              Initial N (kg/ha) is calculated with the assumption that microbial biomass maintains a constant C:N ratio.
          ExpressionFunction InitialPhosphorus: Expression=[Microbial].C / [Microbial].InitialCPRatio
            Memo
              Initial N (kg/ha) is calculated with the assumption that the inert pool has the same C:N ratio as the bulk soil.
          Constant CNRatio: FixedValue=8
          Constant InitialCPRatio: FixedValue=60
          CarbonFlow Decomposition: destinationNames=[Microbial, Humic]; destinationFraction=[0.6, 0.4]
            Memo
              Decomposition of this pool is calculated as a first-order process with rate constants modified by factors such as soil temperature and moisture. There is also an internal cycling of carbon and nitrogen (ie microbes feeding on microbial products).
            MultiplyFunction Rate
              CalculateOnceFunction PotentialRate
                StringComparisonFunction ConstantValue: PropertyName=[Soil].SoilType; StringValue=sand
                  Memo
                    The default potential decomposition rate comes from SoilN ([probert_apsims_1998]). For sandy soils, the rate is modified as per [Asseng1998163].
                  Constant TrueValue: FixedValue=0.0324
                  Constant FalseValue: FixedValue=0.0081
              CERESMineralisationTemperatureFactor TF
              CERESMineralisationWaterFactor
            Constant CO2Efficiency: FixedValue=0.4
        NutrientPool Humic
          Memo
            The humic pool represents the largest soil organic matter pool consisting of organic matter with much lower decomposition rate.
          ExpressionFunction InitialCarbon
            Expression=(1-[Soil].Organic.FInert)*[Soil].Organic.Carbon * 100 * [Soil].Physical.BD * [Soil].Physical.Thickness - [Microbial].C
            Memo
              Initial C (kg/ha) is calculated as that component of the total soil carbon that has not been already attributed to the other soil carbon pools.
          ExpressionFunction InitialNitrogen: Expression=[Humic].C / [Soil].Organic.CNR
            Memo
              Initial N (kg/ha) is calculated with the assumption that the inert pool has the same C:N ratio as the bulk soil.
          ExpressionFunction InitialPhosphorus: Expression=[Humic].C / [Humic].InitialCPRatio
            Memo
              Initial N (kg/ha) is calculated with the assumption that the inert pool has the same C:N ratio as the bulk soil.
          CarbonFlow Decomposition: destinationNames=[Microbial]; destinationFraction=[1]
            Memo
              Decomposition of this pool is calculated as a first-order process with rate constants modified by factors such as soil temperature and moisture.
            MultiplyFunction Rate
              Constant PotentialRate: FixedValue=0.00015
              CERESMineralisationTemperatureFactor TF
              CERESMineralisationWaterFactor WF
            Constant CO2Efficiency: FixedValue=0.4
          Constant InitialCPRatio: FixedValue=100
        StringComparisonFunction WaterFactorForMineralisation: PropertyName=[Soil].SoilType; StringValue=Sand
          LinearInterpolationFunction TrueValue
            SoilWaterScale
            XYPairs: X=[0, 0.5, 1, 2]; Y=[0.05, 1, 1, 0.5]
            VariableReference XValue: VariableName=[SoilWaterScale]
          LinearInterpolationFunction FalseValue
            SoilWaterScale
            XYPairs: X=[0, 0.5, 1, 2]; Y=[0, 1, 1, 0.5]
            VariableReference XValue: VariableName=[SoilWaterScale]
        ExpressionFunction ppm2kgha: Expression=([Soil].Physical.BD*[Soil].Physical.Thickness)/100
        LinearInterpolationFunction WaterFactorForPAvailabilityLoss
          SoilWaterScale
          XYPairs: X=[0, 0.5, 1, 2]; Y=[0.6, 1, 1, 1]
          VariableReference XValue: VariableName=[SoilWaterScale]
        Constant RateLossAvailableP: FixedValue=0.001
        Constant AvailablePRatio: FixedValue=0.1
        NFlow Hydrolysis: sourceName=Urea; destinationName=NH4
          Memo
            The nitrogen flow captures the conversion of urea to ammonium by urease enzymes from soil bacteria.
          CERESUreaHydrolysisModel Rate
            CERESMineralisationWaterFactor
          Constant NLoss: FixedValue=0
          Constant N2OFraction: FixedValue=0
        NFlow Denitrification: sourceName=NO3
          Memo
            Denitrification is simulated using the approaches initially used in CERES Maize ([jones_ceres-maize:_1986]) as implemented in APSIM SoilN ([probert_apsims_1998]).  These were based upon the work of [Rolston1984].  Denitrification rate is calculated using this approach to account for the effect of soil carbon, temperature and water on the fraction of nitrate lost on a daily basis.
          Constant NLoss: FixedValue=1
          CERESDenitrificationModel Rate: DenitrificationRateModifier=0.0006; IsInertActive=true
            CERESDenitrificationTemperatureFactor
            CERESDenitrificationWaterFactor
          DayCentN2OFractionModel N2OFraction
            Memo
              The emission of N2O during denitrification is calculated from an N2:N2O ratio using the approach from the DayCent model ([PARTON1998]) as previously tested in APSIM ([THORBURN2010]).
        NFlow Nitrification: sourceName=NH4; destinationName=NO3
          Memo
            Denitrification is simulated using the approaches initially used in CERES Maize ([jones_ceres-maize:_1986]) as implemented in APSIM SoilN ([probert_apsims_1998]).
          CERESNitrificationModel Rate: PotentialNitrificationRate=40; ConcentrationAtHalfMax=90
            CERESNitrificationWaterFactor
            CERESNitrificationpHFactor
            CERESMineralisationTemperatureFactor
          Constant NLoss: FixedValue=0.002
          Constant N2OFraction: FixedValue=1
            Memo
              Currently, no N2O is assumed to be produced during nitrification processes.
        PFlow LabileToUnavailablePFlow: sourceName=LabileP; destinationName=UnavailableP
          MultiplyFunction Rate
            VariableReference LossRate: VariableName=[Nutrient].RateLossAvailableP
            VariableReference WaterFactor: VariableName=[Nutrient].WaterFactorForPAvailabilityLoss
            PAvailabilityLossTemperatureFactor
        PFlow UnavailableToLabilePFlow: sourceName=UnavailableP; destinationName=LabileP
          MultiplyFunction Rate
            VariableReference LossRate: VariableName=[Nutrient].RateLossAvailableP
            VariableReference WaterFactor: VariableName=[Nutrient].WaterFactorForPAvailabilityLoss
            PAvailabilityLossTemperatureFactor
            VariableReference AvailablePRatio: VariableName=[Nutrient].AvailablePRatio
      Solute NO3: Thickness=[1800]; InitialValues=[5]; InitialValuesUnits=ppm; WaterTableConcentration=0; D0=0
      Solute NH4: Thickness=[1800]; InitialValues=[0.1]; InitialValuesUnits=ppm; WaterTableConcentration=0; D0=0
      Solute Urea: Thickness=[1800]; InitialValues=[0]; InitialValuesUnits=kg/ha; WaterTableConcentration=0; D0=0
  Summary
  DataStore
    ExcelInput Observed: FileNames=[ObservedExample.xlsx]; SheetNames=[Observed]
  CroptimizR: PredictedTableName=DailyReport; ObservedTableName=Observed; RandomSeed=1
    Parameters:
      {Name=SowDate, Path=.Simulations.Replacements.SowOnFixedDate.Script.SowDate, LowerBound=166, UpperBound=180}
      {Name=NO3N, Path=.Simulations.Replacements.APS6Field.NO3.InitialValues[1], LowerBound=0, UpperBound=10}
    VariableNames:
      Wheat.AboveGround.Wt
      Wheat.AboveGround.N
      Wheat.Leaf.LAI
      Wheat.Grain.Wt
    OptimizationMethod={CriticalFunction=0, NoRepetitions=3, Tolerance=0.01, MaxEval=5}
    Experiment APS6
      Memo
        NOTE: High N treatment logdged.  Final grain sizes were less than expected.
      Factors
        Factor NRate: Specification=[ApplyFertiliser]
          Operations 0
          Operations 40
            1992-06-16  [Fertiliser].Apply(Amount: 40, Type: Fertiliser.Types.NO3N);
          Operations 80
            1992-06-16  [Fertiliser].Apply(Amount: 80, Type: Fertiliser.Types.NO3N);
          Operations 120
            1992-06-16  [Fertiliser].Apply(Amount: 60, Type: Fertiliser.Types.NO3N);
            1992-08-05  [Fertiliser].Apply(Amount: 60, Type: Fertiliser.Types.NO3N);
          Operations 160
            1992-06-16  [Fertiliser].Apply(Amount: 40, Type: Fertiliser.Types.NO3N);
            1992-08-05  [Fertiliser].Apply(Amount: 120, Type: Fertiliser.Types.NO3N);
          Operations 360
            1992-06-16  [Fertiliser].Apply(Amount: 120, Type: Fertiliser.Types.NO3N);
            1992-08-05  [Fertiliser].Apply(Amount: 120, Type: Fertiliser.Types.NO3N);
            1992-09-08  [Fertiliser].Apply(Amount: 120, Type: Fertiliser.Types.NO3N);
      Simulation APS6Base
        Clock: Start=1992-06-14; End=1992-11-17
        Summary summaryfile
        Weather: FileName=%root%/Examples/Optimisation/APS6.met
        MicroClimate: a_interception=0; b_interception=1; c_interception=0; d_interception=0; SoilHeatFluxFraction=0.4; MinimumHeightDiffForNewLayer=0; NightInterceptionFraction=0.5; ReferenceHeight=2
        SoilArbitrator Soil Arbitrator
        Zone paddock: Area=1; Slope=0; AspectAngle=0; Altitude=50
          Irrigation
          Fertiliser
          Soil APS6Field: SoilType=APS6Soil; LocalName=APS6Site; Site=APS6Site; NearestTown=Unknown; Region=Lawes; NaturalVegetation=Unknown; Latitude=0; Longitude=0
            Physical: same as Replacements.APS6Field.Physical
            WaterBalance SoilWater: SummerDate=1-Nov; SummerU=6; SummerCona=3.5; WinterDate=1-Apr; WinterU=6; WinterCona=3.5; DiffusConst=88; DiffusSlope=35.4; Salb=0.13; CN2Bare=60; CNRed=20; CNCov=0.8; DischargeWidth=0; CatchmentArea=0
              Thickness  SWCON  KLAT
              150        0.3    0
              150        0.3    0
              300        0.3    0
              300        0.3    0
              300        0.3    0
              300        0.3    0
              300        0.3    0
            Organic: same as Replacements.APS6Field.Organic
            Chemical: Thickness=[150, 150, 300, 300, 300, 300, 300]; PH=[7.5, 8, 8, 8, 8, 8, 8]; PHUnits=Water
            Water: Thickness=[150, 150, 300, 300, 300, 300, 300]; InitialValues=[0.326, 0.326, 0.346, 0.333, 0.315, 0.326, 0.326]; FilledFromTop=false
            CERESSoilTemperature Temperature
            Nutrient
            Solute NO3: Thickness=[150, 150, 300, 300, 300, 300, 300]; InitialValues=[0, 0.6, 0.25, 0.2, 0.1, 0.1, 0.1]; InitialValuesUnits=ppm; WaterTableConcentration=0; D0=0
            Solute NH4: Thickness=[150, 150, 300, 300, 300, 300, 300]; InitialValues=[1.3, 1, 1, 0.8, 0.8, 0.5, 0.5]; InitialValuesUnits=ppm; WaterTableConcentration=0; D0=0
            Solute Urea: Thickness=[150, 150, 300, 300, 300, 300, 300]; InitialValues=[0, 0, 0, 0, 0, 0, 0]; InitialValuesUnits=kg/ha; WaterTableConcentration=0; D0=0
          SurfaceOrganicMatter: InitialResidueName=wheat_stubble; InitialResidueType=wheat; InitialResidueMass=500; InitialStandingFraction=0; InitialCPR=0; InitialCNR=100
          Plant Wheat
          Manager SowOnFixedDate
            Crop = [Wheat]
            SowDate = 167
            CultivarName = Hartog
            SowingDepth = 30
            RowSpacing = 250
            Population = 100
```csharp
using APSIM.Shared.Utilities;
using Models.Utilities;
using Models.Soils;
using Models.PMF;
using Models.Core;
using System;
using System.Linq;

namespace Models
{
    [Serializable]
    public class Script : Model
    {
        [Link] Clock Clock;
        [Link] Fertiliser Fertiliser;
        [Link] Summary Summary;
        [Link] Soil Soil;
        
        [Description("Crop")]
        public IPlant Crop { get; set; }

        [Description("Sowing day of year")]
        public double SowDate { get; set; }

        [Display(Type = DisplayType.CultivarName)]
        [Description("Cultivar to be sown")]
        public string CultivarName { get; set; }

        [Description("Sowing depth (mm)")]
        public double SowingDepth { get; set; }

        [Description("Row spacing (mm)")]
        public double RowSpacing { get; set; }

        [Description("Plant population (/m2)")]
        public double Population { get; set; }

        [EventSubscribe("DoManagement")]
        private void OnDoManagement(object sender, EventArgs e)
        {
            if (Clock.Today.DayOfYear == (int)(SowDate+0.5))
            {
                Crop.Sow(population: Population, cultivar: CultivarName, depth: SowingDepth, rowSpacing: RowSpacing);    
            }
        }
    }
}
```
          Manager AutoIrrigation
            FASW = 0
            WaterDeficit = 0
            Crop = [Wheat]
            AutoIrrigationOn = True
            FASWThreshold = 0.75
            FASWDepth = 600
            weeks = 1
            afterSowing = 1
```csharp
using Models.Interfaces;
using System;
using System.Linq;
using Models.Core;
using System.Collections.Generic;
using System.Text;
using Models.Soils;
using Models.PMF;
using Models;
using System.Xml.Serialization;
using APSIM.Shared.Utilities;
using Models.Interfaces;
namespace Models
{
    [Serializable] 
    public class Script : Model
    {
        [Link] private Zone zone;
        [Link] private Irrigation irrigation;
        [Link] private ISoilWater waterBalance;
        [Link] private IPhysical soilPhysical;
        public double FASW { get; set; }
        public double WaterDeficit  { get; set; }
    


        [Description("Crop to irrigate")]
        public IPlant Crop { get; set; }
        
        [Description("Auto irrigation on?")]
        public bool AutoIrrigationOn { get; set; }

        [Description("Threshold fraction available water (0-1)")]
        public double FASWThreshold { get; set; }

        [Description("Soil depth (mm) to which fraction available water is calculated")]
        public double FASWDepth { get; set; }

        [Description("Minimum weeks between irrigations")]
        public double weeks { get; set; }

        [Description("Minimum days after sowing for first irrigation")]
        public int afterSowing { get; set; }

        private double irrigationGap = 0;    // gap between irrigations

        /// <summary>Called at start of simulation. Performs some basic error checking. </summary>
        [EventSubscribe("StartOfSimulation")]
        private void ErrorChecking(object sender, EventArgs args)
        {
            if (Crop == null)
                throw new Exception("No crop was specified in script " + Parent.Name);
        }

        [EventSubscribe("DoManagement")]
        private void OnDoManagement(object sender, EventArgs e)
        {
            if (AutoIrrigationOn && Crop.IsAlive)
            {
                   irrigationGap += 1;                // increment gap between irrigations
                CalculateFASW();                // calc FASW and WaterDeficit
                if ((FASW < FASWThreshold) && (irrigationGap >= weeks * 7))
                {
                    irrigation.Apply(WaterDeficit, depth: 0);
                    irrigationGap = 0;            // reset
                }
            }
            else
            {
                irrigationGap = weeks * 7 - afterSowing - 1;    // allow irrigation a number of days after it becomes alive/sown
            }
        }

        // Calculate the fraction of the potential available sw
        // Calculate the deficit amount from DUL
        private void CalculateFASW()
        {
            double[] LL15 = MathUtilities.Multiply(soilPhysical.LL15, soilPhysical.Thickness);
            double[] DUL = MathUtilities.Multiply(soilPhysical.DUL, soilPhysical.Thickness);
        
            int nlayr = GetLayerIndex(FASWDepth);
            double cumdep = MathUtilities.Sum(soilPhysical.Thickness, 0, nlayr, 0.0);    // tricky function that sums up to before nlayr

            double part_layer = MathUtilities.Divide((FASWDepth - cumdep), soilPhysical.Thickness[nlayr], 0.0);

            // note that results may be strange if swdep < ll15
            double avail_sw = (MathUtilities.Sum(waterBalance.SWmm, 0, nlayr, 0.0) + part_layer * waterBalance.SWmm[nlayr])
                            - (MathUtilities.Sum(LL15, 0, nlayr, 0.0) + part_layer * LL15[nlayr]);

            double pot_avail_sw = (MathUtilities.Sum(DUL, 0, nlayr, 0.0) + part_layer * DUL[nlayr])
                                - (MathUtilities.Sum(LL15, 0, nlayr, 0.0) + part_layer * LL15[nlayr]);
            
            FASW = MathUtilities.Divide(avail_sw, pot_avail_sw, 0.0);
            WaterDeficit = MathUtilities.Constrain(pot_avail_sw - avail_sw, 0.0, 100000);
        }

        // Get index of the layer that has this depth in it 
        private int GetLayerIndex(double pointDepth)
        {
            double[] cumThickness = soilPhysical.ThicknessCumulative;
            int layerIdx = 0;
            while ((layerIdx < cumThickness.Length) && (pointDepth > cumThickness[layerIdx]))
            {
                layerIdx += 1;
            }

            return layerIdx;
        }
    }
}
```
          Operations ApplyFertiliser
            1992-06-16  [Fertiliser].Apply(Amount: 0, Type: Fertiliser.Types.NO3N);
          Report DailyReport: EventNames=[Clock].DoReport
            VariableNames:
              [Clock].Today
              [Wheat].AboveGround.Wt
              [Wheat].AboveGround.N
              [Wheat].Grain.Wt
              [Wheat].Leaf.LAI
          Report HarvestReport
          Manager Harvesting
```csharp
using Models.PMF.Phen;
using APSIM.Shared.Utilities;
using System.Xml.Serialization;
using Models;
using Models.PMF;
using Models.Soils;
using System.Text;
using System.Collections.Generic;
using Models.Core;
using System;
using System.Linq;
using Models.Soils.Nutrients;

namespace Models
{
    [Serializable] 
    public class Script : Model
    {
        [Link] private Plant Wheat;
        [Link(Type = LinkType.Path, Path = "[Wheat].Phenology")]
        private Phenology phenology;
        [EventSubscribe("DoManagement")]
        private void OnDoManagement(object sender, EventArgs e)
        {
            if (phenology.CurrentPhase.Name == "ReadyForHarvesting")
            {
                Wheat.Harvest();
                Wheat.EndCrop();
            }
        }
    }
}
```
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