Simulations: Version=133
  DataStore
  Replacements
    Plant Peanut: PlantType=Peanut; IsAlive=false; IsEnding=false; DaysAfterEnding=0
      OrganArbitrator Arbitrator
        BiomassTypeArbitrator DMArbitration
          Folder PotentialPartitioningMethods
            ReallocationMethod
            AllocateFixationMethod
            RetranslocationMethod
            SendPotentialDMAllocationsMethod
          Folder AllocationMethods
            NutrientConstrainedAllocationMethod
            DryMatterAllocationsMethod
          RelativeAllocation ArbitrationMethod
        BiomassTypeArbitrator NArbitration
          Folder PotentialPartitioningMethods
            ReallocationMethod
          Folder ActualPartitioningMethods
            AllocateFixationMethod
            RetranslocationMethod
          Folder AllocationMethods
            NitrogenAllocationsMethod
          RelativeAllocation ArbitrationMethod
          AllocateUptakesMethod
        WaterUptakeMethod
        NitrogenUptakeMethod
      Phenology
        Memo Introduction
          In the new model we simplified phenology by taking out stages that are not measurable (e.g. end of juvenile stage) and by adding new stages that are measurable (e.g. start pod).
          The new phenology follows the V/R staging system
        LinearInterpolationFunction PreemergentThermalTime
          XYPairs: X=[13, 25, 50]; Y=[0, 12, 0]
          Memo
            These parameters are overridden by cultivar parameter descriptions to capture the difference between individual cultivars in terms of their phenological development.  Responses shown here are only indicative.  See cultivar descriptions for more information.
          VariableReference XValue: VariableName=[IWeather].MeanT
        LinearInterpolationFunction VegetativeThermalTime
          XYPairs: X=[9, 32, 50]; Y=[0, 23, 0]
          Memo
            These parameters are overridden by cultivar parameter descriptions to capture the difference between individual cultivars in terms of their phenological development.  Responses shown here are only indicative.  See cultivar descriptions for more information.
          VariableReference XValue: VariableName=[IWeather].MeanT
        LinearInterpolationFunction ReproductiveThermalTime
          XYPairs: X=[0, 22, 32, 40]; Y=[13, 13, 23, 23]
          VariableReference XValue: VariableName=[IWeather].MeanT
        PhaseLookup ThermalTime
          PhaseLookupValue PreEmergence: Start=Sowing; End=Emergence
            VariableReference TT: VariableName=[Phenology].PreemergentThermalTime
          PhaseLookupValue VegetativeGrowth: Start=Emergence; End=StartFlowering
            VariableReference TT: VariableName=[Phenology].VegetativeThermalTime
          PhaseLookupValue ReproductiveGrowth: Start=StartFlowering; End=HarvestRipe
            MultiplyFunction TT
              VariableReference ReproductiveTT: VariableName=[Phenology].ReproductiveThermalTime
              LinearInterpolationFunction PPModifier
                XYPairs: X=[13, 16, 20]; Y=[1, 1, 1]
                VariableReference XValue: VariableName=[Phenology].Photoperiod
        PhotoperiodFunction Photoperiod: Twilight=-6; DayLength=0
        GerminatingPhase Germinating: Start=Sowing; End=Germination
        EmergingPhase Emerging: ShootLag=70; ShootRate=0; Start=Germination; End=Emergence; TTForTimeStep=0
          VariableReference ThermalTime: VariableName=[Phenology].PreemergentThermalTime
        GenericPhase Vegetative: Start=Emergence; End=StartFlowering
          Constant Target: FixedValue=390
          VariableReference Progression: VariableName=[Phenology].ThermalTime
        GenericPhase EarlyFlowering: Start=StartFlowering; End=StartPodDevelopment
          Constant Target: FixedValue=200
          VariableReference Progression: VariableName=[Phenology].ThermalTime
        GenericPhase EarlyPodDevelopment: Start=StartPodDevelopment; End=StartGrainFilling
          Constant Target: FixedValue=140
          VariableReference Progression: VariableName=[Phenology].ThermalTime
        GenericPhase EarlyGrainFilling: Start=StartGrainFilling; End=EndCanopyDevelopment
          MultiplyFunction Target
            Constant FractionofGrainfilling: FixedValue=0.05
            VariableReference EntireGrainfilling
              VariableName=[Phenology].LateGrainFilling.Target.EntireGrainfillPeriod.FixedValue
          VariableReference Progression: VariableName=[Phenology].ThermalTime
        GenericPhase MidGrainFilling: Start=EndCanopyDevelopment; End=EndPodDevelopment
          MultiplyFunction Target
            Constant FractionofMidToLateGrainfilling: FixedValue=0.5
            SubtractFunction MidToLateGrainfilling
              VariableReference EntireGrainfilling
                VariableName=[Phenology].LateGrainFilling.Target.EntireGrainfillPeriod.FixedValue
              VariableReference EarlyGrainfilling: VariableName=[Phenology].EarlyGrainFilling.Target
          VariableReference Progression: VariableName=[Phenology].ThermalTime
        GenericPhase LateGrainFilling: Start=EndPodDevelopment; End=EndGrainFill
          SubtractFunction Target
            Constant EntireGrainfillPeriod: FixedValue=1020
            VariableReference EarlyGrainFillingTarget: VariableName=[Phenology].EarlyGrainFilling.Target
            VariableReference MidGrainFillingTarget: VariableName=[Phenology].MidGrainFilling.Target
          VariableReference Progression: VariableName=[Phenology].ThermalTime
        GenericPhase Maturing: Start=EndGrainFill; End=Maturity
          Constant Target: FixedValue=45
          VariableReference Progression: VariableName=[Phenology].ThermalTime
        GenericPhase Ripening: Start=Maturity; End=HarvestRipe
          Constant Target: FixedValue=45
          VariableReference Progression: VariableName=[Phenology].ThermalTime
        EndPhase ReadyForHarvesting: Start=HarvestRipe; End=Unused
          VariableReference ThermalTime: VariableName=[Phenology].ThermalTime
        OnEventFunction EmergenceDAS: SetEvent=Emergence; ReSetEvent=never
          Memo
            A function is used to provide maturity date as days after sowing(DAS).
          Constant PreEventValue: FixedValue=0
          VariableReference PostEventValue: VariableName=[Plant].DaysAfterSowing
        OnEventFunction FloweringDAS: SetEvent=StartFlowering; ReSetEvent=never
          Memo
            A function is used to provide flowering date as days after sowing(DAS).
          Constant PreEventValue: FixedValue=0
          VariableReference PostEventValue: VariableName=[Plant].DaysAfterSowing
        OnEventFunction MaturityDAS: SetEvent=Maturity; ReSetEvent=never
          Memo
            A function is used to provide maturity date as days after sowing(DAS).
          Constant PreEventValue: FixedValue=0
          VariableReference PostEventValue: VariableName=[Plant].DaysAfterSowing
        AccumulateFunction DaysAfterEmergence: StartStageName=Emergence; EndStageName=HarvestRipe; FractionRemovedOnCut=0; FractionRemovedOnHarvest=0; FractionRemovedOnGraze=0; FractionRemovedOnPrune=0
          Constant OneDay: FixedValue=1
      SimpleLeaf Leaf: Albedo=0.25; Gsmax350=0.011; R50=150; LeafInitialisationStage=Emergence; Height=0; BaseHeight=0; Width=0; FRGR=0; PotentialEP=0; WaterDemand=0; KDead=0.3; LAIDead=0
        RUEModel Photosynthesis
          Constant RUE: FixedValue=1.5
            Memo
              This approach is based upon the value used in [robertson_simulation_2002] increased to account for partitioning to roots.
          WeightedTemperatureFunction FT: MaximumTemperatureWeighting=0.75
            Memo
              This approach is based upon that used in Bell, WRight and Hammer (1992) Crop Sci
            XYPairs: X=[10, 21, 35, 40]; Y=[0, 1, 1, 0]
          LinearInterpolationFunction FVPD
            XYPairs: X=[0, 10, 50]; Y=[1, 1, 1]
            VariableReference XValue: VariableName=[Leaf].Photosynthesis.VPD
          LinearInterpolationFunction FN
            XYPairs: X=[0, 1, 1.5]; Y=[0, 1, 1]
            VariableReference XValue: VariableName=[Leaf].Fn
          LinearInterpolationFunction FW
            XYPairs: X=[0, 1]; Y=[0, 1]
            VariableReference XValue: VariableName=[Leaf].Fw
          RUECO2Function FCO2: PhotosyntheticPathway=C3
          VariableReference RadnInt: VariableName=[Leaf].RadiationIntercepted
        StomatalConductanceCO2Modifier
          VariableReference PhotosynthesisCO2Modifier: VariableName=[Leaf].Photosynthesis.FCO2
        MultiplyFunction AreaOLD
          VariableReference SLA: VariableName=[Leaf].SpecificArea
          VariableReference LeafLiveWt: VariableName=[Leaf].Live.Wt
        AddFunction AreaNew
          Constant InitialArea: FixedValue=1
          AccumulateFunction AreaGrowth: StartStageName=Emergence; EndStageName=EndCanopyDevelopment; FractionRemovedOnCut=1; FractionRemovedOnHarvest=1; FractionRemovedOnGraze=1; FractionRemovedOnPrune=0
            MultiplyFunction DeltaArea
              VariableReference DeltaMass: VariableName=[Leaf].Allocated.StructuralWt
              VariableReference SLA: VariableName=[Leaf].SpecificArea
        AddFunction Area
          MultiplyFunction Initial
            Constant AreaPerPlant: FixedValue=0.005
            VariableReference Population: VariableName=[Peanut].SowingData.Population
          SubtractFunction Change
            AccumulateAtEvent AreaGrowth: StartStageName=Emergence; EndStageName=EndCanopyDevelopment; AccumulateEventName=[Clock].DoActualPlantGrowth
              MultiplyFunction DeltaArea
                VariableReference DeltaMass: VariableName=[Leaf].Allocated.StructuralWt
                VariableReference SLA: VariableName=[Leaf].SpecificArea
            AccumulateAtEvent AreaLoss: StartStageName=EndCanopyDevelopment; EndStageName=HarvestRipe; AccumulateEventName=[Clock].DoActualPlantGrowth
              MultiplyFunction DeltaArea
                VariableReference DeltaMass: VariableName=[Leaf].Senesced.StructuralWt
                VariableReference SLA: VariableName=[Leaf].SpecificAreaCanopy
        MinimumFunction FRGR
          VariableReference RUE_FT: VariableName=[Leaf].Photosynthesis.FT
          MinimumFunction Others
            VariableReference RUE_FN: VariableName=[Leaf].Photosynthesis.FN
            VariableReference RUE_FVPD: VariableName=[Leaf].Photosynthesis.FVPD
        LinearInterpolationFunction ExtinctionCoefficient
          Memo
            This approach is based upon that described by [Porter2000PhD] to account for the impacts of population and row/plant spacing.  Extinction coefficient is said to decrease with decreasing inter-plant spacing within the plant row.
          XYPairs: X=[0, 335]; Y=[0.214, 0.7]
          ExpressionFunction XValue
            Expression=1000000/[Peanut].SowingData.Population/[Peanut].SowingData.RowSpacing
        LinearInterpolationFunction Tallness
          XYPairs: X=[1, 2, 3, 4, 5, 6, 9]; Y=[0, 0, 50, 400, 450, 450, 450]
          VariableReference XValue: VariableName=[Phenology].Stage
        AccumulateFunction NodeNumber: StartStageName=Emergence; EndStageName=EndCanopyDevelopment; FractionRemovedOnCut=1; FractionRemovedOnHarvest=1; FractionRemovedOnGraze=1; FractionRemovedOnPrune=0
          DivideFunction DeltaNode
            VariableReference ThermalTime: VariableName=[Phenology].VegetativeThermalTime
            VariableReference Phyllochron: VariableName=[Leaf].Phyllochron
        AddFunction BranchNumber
          Constant One: FixedValue=1
          AccumulateFunction CumulativeBranching: StartStageName=Emergence; EndStageName=EndCanopyDevelopment; FractionRemovedOnCut=1; FractionRemovedOnHarvest=1; FractionRemovedOnGraze=1; FractionRemovedOnPrune=0
            MultiplyFunction DeltaBranch
              VariableReference DeltaNode: VariableName=[Leaf].NodeNumber.DeltaNode
              VariableReference BranchingRate: VariableName=[Leaf].BranchingRate
              LinearInterpolationFunction TemperatureFactor
                XYPairs: X=[20, 28, 32, 40]; Y=[1, 1, 1, 1]
                VariableReference XValue: VariableName=[Weather].MeanT
              LinearInterpolationFunction WaterFactor
                XYPairs: X=[0.5, 1]; Y=[0, 1]
                VariableReference XValue: VariableName=[Leaf].Fw
              LinearInterpolationFunction CoverFactor
                XYPairs: X=[0, 0.33, 0.5, 1]; Y=[1, 1, 0, 0]
                VariableReference XValue: VariableName=[Leaf].CoverTotal
              LinearInterpolationFunction PPFactor
                XYPairs: X=[12, 13]; Y=[0, 1]
                VariableReference XValue: VariableName=[Phenology].Photoperiod
        AccumulateFunction Number: StartStageName=Emergence; EndStageName=EndCanopyDevelopment; FractionRemovedOnCut=1; FractionRemovedOnHarvest=1; FractionRemovedOnGraze=1; FractionRemovedOnPrune=0
          MultiplyFunction DailyNumberIncrease
            VariableReference DeltaNode: VariableName=[Leaf].NodeNumber.DeltaNode
            VariableReference BranchNumber: VariableName=[Leaf].BranchNumber
            VariableReference PlantNumber: VariableName=[Peanut].SowingData.Population
        AccumulateAtEvent BranchNumberNew (disabled): StartStageName=Emergence; EndStageName=EndCanopyDevelopment; AccumulateEventName=DoUpdate
          MultiplyFunction DeltaBranch
            VariableReference DeltaNode: VariableName=[Leaf].NodeNumber.DeltaNode
            LinearInterpolationFunction BranchingRate
              Memo
                From Hammer Paper
              XYPairs: X=[0, 2, 3, 6, 7, 15, 16]; Y=[0, 0, 1, 1, 1.5, 1.5, 0]
              VariableReference XValue: VariableName=[Leaf].NodeNumber
        Constant NReallocationFactor: FixedValue=1
          Memo
            This model assumes that all metabolic and storage N is available for reallocation from senescing leaves.
        PhaseLookup SenescenceRate
          PhaseLookupValue Vegetative: Start=Emergence; End=EndPodDevelopment
            Constant Rate: FixedValue=0
          PhaseLookupValue Reproductive: Start=EndPodDevelopment; End=Maturity
            Memo
              Leaf senescence rate is calculated to ensure that all leaves are senesced by crop maturity.
            DivideFunction Rate
              VariableReference TT: VariableName=[Phenology].ThermalTime
              SubtractFunction TTRemaining
                ExpressionFunction TTRequired
                  Expression=[Phenology].LateGrainFilling.Target + [Phenology].Maturing.Target + 1000
                ExpressionFunction TTComplete
                  Expression=[Phenology].LateGrainFilling.ProgressThroughPhase + [Phenology].Maturing.ProgressThroughPhase
              Constant Modifier: FixedValue=1
          PhaseLookupValue Senescent: Start=Maturity; End=HarvestRipe
            Memo
              Leaf senescence rate is calculated to ensure that all leaves are senesced by crop maturity.
            Constant Rate: FixedValue=0.1
        Constant DetachmentRate: FixedValue=0.05; Units=/d
        MultiplyFunction InitialWt
          Constant MassPerPlant: FixedValue=0.06
          VariableReference Population: VariableName=[Peanut].SowingData.Population
        MultiplyFunction LAIDead
          VariableReference SLA: VariableName=[Leaf].SpecificAreaCanopy
          VariableReference LeafDeadWt: VariableName=[Leaf].Dead.Wt
        LinearInterpolationFunction MaximumNConc
          XYPairs: X=[3, 4, 9]; Y=[0.06, 0.05, 0.03]
          VariableReference XValue: VariableName=[Phenology].Stage
        LinearInterpolationFunction CriticalNConc
          XYPairs: X=[3, 4, 9]; Y=[0.06, 0.05, 0.03]
          VariableReference XValue: VariableName=[Phenology].Stage
        Constant MinimumNConc: FixedValue=0.02
        Constant MaintenanceRespiration: FixedValue=0; Units=0-1
        Constant DMConversionEfficiency: FixedValue=1; Units=0-1
        BiomassRemoval BiomassRemovalDefaults
          OrganBiomassRemovalType Harvest: FractionLiveToRemove=0; FractionDeadToRemove=0; FractionLiveToResidue=1; FractionDeadToResidue=1
          OrganBiomassRemovalType Cut: FractionLiveToRemove=0; FractionDeadToRemove=0; FractionLiveToResidue=1; FractionDeadToResidue=1
          OrganBiomassRemovalType Prune: FractionLiveToRemove=0; FractionDeadToRemove=0; FractionLiveToResidue=0; FractionDeadToResidue=0
          OrganBiomassRemovalType Graze: FractionLiveToRemove=0; FractionDeadToRemove=0; FractionLiveToResidue=0; FractionDeadToResidue=0
        Constant NRetranslocationFactor: FixedValue=0.5
        Constant DMReallocationFactor: FixedValue=0
        Constant DMRetranslocationFactor: FixedValue=0.5
        Constant RemobilisationCost: FixedValue=0
        Constant CarbonConcentration: FixedValue=0.4
        BiomassDemand DMDemands
          DivideFunction Structural
            VariableReference DeltaLAI: VariableName=[Leaf].DeltaLAI
            VariableReference SLA: VariableName=[Leaf].SpecificArea
            Memo
              Growth in leaf area is used to calculate the leaf dry matter demand.  Note that leaf biomass is assumed to consist of entirely structural dry matter.
          Constant Storage: FixedValue=0
          Constant Metabolic: FixedValue=0
        BiomassDemand NDemands
          MultiplyFunction Structural
            VariableReference MinNconc: VariableName=[Leaf].minimumNconc
            VariableReference PotentialDMAllocation: VariableName=[Leaf].potentialDMAllocation.Structural
          MultiplyFunction Metabolic
            SubtractFunction MetabolicNconc
              VariableReference CritNconc: VariableName=[Leaf].criticalNConc
              VariableReference MinNconc: VariableName=[Leaf].minimumNconc
            VariableReference PotentialDMAllocation: VariableName=[Leaf].potentialDMAllocation.Structural
          StorageNDemandFunction Storage
            Constant NitrogenDemandSwitch: FixedValue=1
            VariableReference MaxNconc: VariableName=[Leaf].maximumNconc
        LinearInterpolationFunction FrostFraction
          XYPairs: X=[-4, 4]; Y=[1, 0]
          VariableReference XValue: VariableName=[Weather].MinT
        LinearInterpolationFunction SpecificArea
          XYPairs: X=[0, 17, 21, 35]; Y=[0.027, 0.027, 0.027, 0.027]
          VariableReference XValue: VariableName=[Weather].MinT
        PhaseLookup DeltaLAI
          PhaseLookupValue Vegetative: Start=Emergence; End=EndCanopyDevelopment
            MultiplyFunction Delta
              VariableReference AreaLargestLeaf: VariableName=[Leaf].AreaLargestLeaf
              PhaseLookup RelativeArea
                PhaseLookupValue BeforeEndPod: Start=Emergence; End=StartPodDevelopment
                  LinearInterpolationFunction RelativeArea
                    Memo
                      This approach is based upon that used in [robertson_simulation_2002].
                    XYPairs: X=[2, 4, 6, 7, 10]; Y=[0.5, 1, 1, 1, 1]
                    VariableReference XValue: VariableName=[Leaf].NodeNumber
                PhaseLookupValue AfterEndPod: Start=StartPodDevelopment; End=EndCanopyDevelopment
                  Constant RelativeArea: FixedValue=1
              VariableReference PlantNumber: VariableName=[Peanut].SowingData.Population
              VariableReference BranchNumber: VariableName=[Leaf].BranchNumber
              DivideFunction LAR
                VariableReference TT: VariableName=[Phenology].VegetativeThermalTime
                VariableReference Phyllochron: VariableName=[Leaf].Phyllochron
              LinearInterpolationFunction LeafSizeTemperatureFactor
                XYPairs: X=[20, 22, 32, 40]; Y=[1, 1, 1, 0]
                VariableReference XValue: VariableName=[Weather].MeanT
          PhaseLookupValue Reproductive: Start=EndCanopyDevelopment; End=Maturity
            Constant: FixedValue=0
        Constant AreaLargestLeaf: FixedValue=0.0014
        DivideFunction SpecificAreaCanopy
          VariableReference LAI: VariableName=[Leaf].Area
          VariableReference LeafWt: VariableName=[Leaf].Live.Wt
        PhaseLookup Phyllochron
          PhaseLookupValue EarlyVegetative: Start=Emergence; End=StartGrainFilling
            Constant Phyllochron: FixedValue=56
              Memo
                This value is based upon that used in [robertson_simulation_2002].
          PhaseLookupValue LateVegetative: Start=StartGrainFilling; End=EndCanopyDevelopment
            MultiplyFunction Phyllochron
              Constant Base: FixedValue=56
                Memo
                  This value is based upon that used in [robertson_simulation_2002].
              LinearInterpolationFunction PPFactor
                XYPairs: X=[10, 12, 12.8, 14]; Y=[10, 10, 1, 1]
                VariableReference XValue: VariableName=[Phenology].Photoperiod
          PhaseLookupValue Reproductive: Start=EndCanopyDevelopment; End=Maturity
            Constant: FixedValue=0
        LinearInterpolationFunction BranchingRate
          Memo
            From Hammer Paper
          XYPairs: X=[0, 1, 2, 3, 15, 16]; Y=[0, 2, 1, 0.5, 0.5, 0]
          VariableReference XValue: VariableName=[Leaf].NodeNumber
      ReproductiveOrgan Grain: GrowthRespiration=0; MaintenanceRespiration=0
        Biomass Live: DMDOfStructural=0.6
        Biomass Dead: DMDOfStructural=0.6
        AddFunction FillingDuration
          VariableReference EarlyGrainFillingDuration: VariableName=[Phenology].EarlyGrainFilling.Target
          VariableReference MidGrainFillingDuration: VariableName=[Phenology].MidGrainFilling.Target
          VariableReference LateGrainFillingDuration: VariableName=[Phenology].LateGrainFilling.Target
        PhaseLookup DMDemandFunction
          PhaseLookupValue GrainFilling: Start=StartGrainFilling; End=EndGrainFill
            MultiplyFunction HIGrainDemand
              VariableReference AboveGroundWt: VariableName=[AboveGround].Wt
              DivideFunction HarvestIndexIncrease
                MaximumFunction OutstandingHarvestIndexIncrease
                  ExpressionFunction Increase: Expression=[Grain].PotentialHarvestIndex - [Grain].HarvestIndex
                  Constant Zero: FixedValue=0
                SubtractFunction TTRemaining
                  ExpressionFunction ReproductiveTT
                    Expression=[Phenology].EarlyGrainFilling.Target+[Phenology].MidGrainFilling.Target+[Phenology].LateGrainFilling.Target
                  ExpressionFunction ReproductiveTTComplete
                    Expression=[Phenology].EarlyGrainFilling.ProgressThroughPhase+[Phenology].MidGrainFilling.ProgressThroughPhase+[Phenology].LateGrainFilling.ProgressThroughPhase
              VariableReference ThermalTime: VariableName=[Phenology].ThermalTime
        Constant MinimumNConc: FixedValue=0.05
        Constant MaximumNConc: FixedValue=0.058
        Constant WaterContent: FixedValue=0.13
        MultiplyFunction NFillingRate
          VariableReference NConc: VariableName=[Grain].MaximumNConc
          VariableReference DMDemand: VariableName=[Grain].DMDemandFunction
          VariableReference DMConversionEfficiency: VariableName=[Grain].DMConversionEfficiency
        BiomassRemoval BiomassRemovalDefaults
          OrganBiomassRemovalType Harvest: FractionLiveToRemove=1; FractionDeadToRemove=1; FractionLiveToResidue=0; FractionDeadToResidue=0
          OrganBiomassRemovalType Cut: FractionLiveToRemove=0; FractionDeadToRemove=0; FractionLiveToResidue=1; FractionDeadToResidue=1
          OrganBiomassRemovalType Prune: FractionLiveToRemove=0; FractionDeadToRemove=0; FractionLiveToResidue=0; FractionDeadToResidue=0
          OrganBiomassRemovalType Graze: FractionLiveToRemove=0; FractionDeadToRemove=0; FractionLiveToResidue=0; FractionDeadToResidue=0
        Constant DMConversionEfficiency: FixedValue=0.89
        Constant RemobilisationCost: FixedValue=0
        Constant CarbonConcentration: FixedValue=0.4
        DivideFunction HarvestIndex
          VariableReference GrainWt: VariableName=[Grain].Wt
          VariableReference AboveGroundWt: VariableName=[AboveGround].Wt
        Constant MaximumPotentialGrainSize: FixedValue=0
          Memo
            This parameter is not used.  Grain growth is calculated from harvest index increase.
        Constant NumberFunction: FixedValue=0
          Memo
            Grain number is not estimated by this model.
        MultiplyFunction PotentialHarvestIndex
          VariableReference PodHarvestIndex: VariableName=[Pod].PotentialHarvestIndex
          Constant GrainFraction: FixedValue=0.72; Units=0-1
      Root: GrowthRespiration=0; MaintenanceRespiration=0
        RootShapeCylindre RootShape
        LinearInterpolationFunction KLModifier
          XYPairs: X=[0, 3]; Y=[1, 1]
          VariableReference XValue: VariableName=[Leaf].LAI
        HourlyInterpolation TemperatureEffect: agregationMethod=0
          XYPairs Response: X=[0, 26, 35]; Y=[1, 1, 1]
          ThreeHourSin InterpolationMethod
        LinearInterpolationFunction MaxDailyNUptake
          XYPairs: X=[0, 5]; Y=[1, 3]
          VariableReference XValue: VariableName=[Leaf].LAI
        Constant SenescenceRate: FixedValue=0.005
        Constant MaximumRootDepth: FixedValue=1000000
        PhaseLookup RootFrontVelocity
          Memo
            This approach is based upon that used in [robertson_simulation_2002].
          PhaseLookupValue PreEmergence: Start=Germination; End=Emergence
            Constant Function: FixedValue=15
          PhaseLookupValue early: Start=Emergence; End=StartGrainFilling
            Constant Function: FixedValue=35
          PhaseLookupValue late: Start=StartGrainFilling; End=Maturity
            Constant Function: FixedValue=0
        Constant MaximumNConc: FixedValue=0.01
        Constant MinimumNConc: FixedValue=0.005
        PhaseLookupValue NitrogenDemandSwitch: Start=Emergence; End=EndGrainFill
          Constant: FixedValue=1
        LinearInterpolationFunction KNO3
          XYPairs: X=[0, 0.003]; Y=[0.02, 0.02]
          VariableReference XValue: VariableName=[Root].LengthDensity
        LinearInterpolationFunction KNH4
          XYPairs: X=[0, 0.003]; Y=[0, 0]
          VariableReference XValue: VariableName=[Root].LengthDensity
        BiomassRemoval BiomassRemovalDefaults
          OrganBiomassRemovalType Harvest: FractionLiveToRemove=0; FractionDeadToRemove=0; FractionLiveToResidue=0.2; FractionDeadToResidue=0
          OrganBiomassRemovalType Cut: FractionLiveToRemove=0; FractionDeadToRemove=0; FractionLiveToResidue=0.2; FractionDeadToResidue=0
          OrganBiomassRemovalType Prune: FractionLiveToRemove=0; FractionDeadToRemove=0; FractionLiveToResidue=0; FractionDeadToResidue=0
          OrganBiomassRemovalType Graze: FractionLiveToRemove=0; FractionDeadToRemove=0; FractionLiveToResidue=0; FractionDeadToResidue=0
        LinearInterpolationFunction NUptakeSWFactor
          XYPairs: X=[0, 1]; Y=[0, 1]
          VariableReference XValue: VariableName=[Root].RWC
        Constant SpecificRootLength: FixedValue=60; Units=m/g
          Memo
            This approach is based upon that used in [robertson_simulation_2002].
        Constant DMConversionEfficiency: FixedValue=1
        Constant MaintenanceRespirationFunction: FixedValue=1
        Constant RemobilisationCost: FixedValue=0
        Constant CarbonConcentration: FixedValue=0.4
        BiomassDemand DMDemands
          MultiplyFunction Structural
            PartitionFractionDemandFunction DMDemandFunction
              PhaseLookup PartitionFraction
                PhaseLookupValue Early: Start=Emergence; End=StartFlowering
                  Constant Function: FixedValue=0.2
                PhaseLookupValue Middle: Start=StartFlowering; End=StartGrainFilling
                  Constant Function: FixedValue=0.2
                PhaseLookupValue Late: Start=StartGrainFilling; End=Maturity
                  Constant Function: FixedValue=0.05
            Constant StructuralFraction: FixedValue=1
          Constant Metabolic: FixedValue=0
          StorageDMDemandFunction Storage
            SubtractFunction StorageFraction
              Constant One: FixedValue=1
              VariableReference StructuralFraction: VariableName=[Root].DMDemands.Structural.StructuralFraction
        BiomassDemand NDemands
          MultiplyFunction Structural
            VariableReference MinNconc: VariableName=[Root].minimumNconc
            VariableReference PotentialDMAllocation: VariableName=[Root].potentialDMAllocation.Structural
          MultiplyFunction Metabolic
            SubtractFunction MetabolicNconc
              VariableReference CritNconc: VariableName=[Root].criticalNConc
              VariableReference MinNconc: VariableName=[Root].minimumNconc
            VariableReference PotentialDMAllocation: VariableName=[Root].potentialDMAllocation.Structural
          StorageNDemandFunction Storage
            VariableReference NitrogenDemandSwitch: VariableName=[Root].nitrogenDemandSwitch
            VariableReference MaxNconc: VariableName=[Root].maximumNconc
        VariableReference CriticalNConc: VariableName=[Root].MinimumNConc
        BiomassDemand InitialWt
          Constant Structural: FixedValue=0.1; Units=g/plant
          Constant Metabolic: FixedValue=0
          Constant Storage: FixedValue=0
        Constant RootDepthStressFactor: FixedValue=1
      Nodule
        Constant FixationMetabolicCost: FixedValue=0
        Constant MaximumNConc: FixedValue=0.02
        Constant MinimumNConc: FixedValue=0.01
        Constant SenescenceRate: FixedValue=0
        Constant NReallocationFactor: FixedValue=0
        PhaseLookupValue NitrogenDemandSwitch: Start=Emergence; End=EndGrainFill
          Constant: FixedValue=1
        BiomassRemoval BiomassRemovalDefaults: same as Replacements.Peanut.Root.BiomassRemovalDefaults
        Constant InitialWtFunction: FixedValue=0; Units=g/m^2
        Constant DetachmentRateFunction: FixedValue=0; Units=/d
        Constant MaintenanceRespirationFunction: FixedValue=0; Units=0-1
        Constant DMConversionEfficiency: FixedValue=1; Units=0-1
        Constant NRetranslocationFactor: FixedValue=0
        Constant DMReallocationFactor: FixedValue=0
        Constant DMRetranslocationFactor: FixedValue=0
        VariableReference CriticalNConc: VariableName=[Nodule].MinimumNConc
        Constant RemobilisationCost: FixedValue=0
        Constant CarbonConcentration: FixedValue=0.4
        HoldFunction FixationRate: WhenToHold=StartGrainFilling
          MinimumFunction DailyPotentialFixationRate
            MultiplyFunction PotentialFixationRate
              VariableReference LiveBiomass: VariableName=[AboveGroundLive].Wt
              PhaseLookup SpecificFixationRate
                PhaseLookupValue VegetativeGrowth: Start=Emergence; End=StartFlowering
                  Constant Rate: FixedValue=0.006
                PhaseLookupValue ReproductiveGrowth: Start=StartFlowering; End=EndGrainFill
                  Constant Rate: FixedValue=0.002
            Constant MaximumFixationRate: FixedValue=0.6
        BiomassDemand DMDemands
          MultiplyFunction Structural
            PartitionFractionDemandFunction DMDemandFunction
              PhaseLookup PartitionFraction
                PhaseLookupValue Early: Start=Emergence; End=StartFlowering
                  Constant Function: FixedValue=0.03
                PhaseLookupValue Middle: Start=StartFlowering; End=StartGrainFilling
                  Constant Function: FixedValue=0.02
                PhaseLookupValue Late: Start=StartGrainFilling; End=Maturity
                  Constant Function: FixedValue=0
            Constant StructuralFraction: FixedValue=1; Units=g/g
          Constant Metabolic: FixedValue=0
          StorageDMDemandFunction Storage
            SubtractFunction StorageFraction
              Constant One: FixedValue=1
              VariableReference StructuralFraction: VariableName=[Nodule].DMDemands.Structural.StructuralFraction
        BiomassDemand NDemands
          MultiplyFunction Structural
            VariableReference MinNconc: VariableName=[Nodule].minimumNconc
            VariableReference PotentialDMAllocation: VariableName=[Nodule].potentialDMAllocation.Structural
          MultiplyFunction Metabolic
            SubtractFunction MetabolicNconc
              VariableReference CritNconc: VariableName=[Nodule].criticalNConc
              VariableReference MinNconc: VariableName=[Nodule].minimumNconc
            VariableReference PotentialDMAllocation: VariableName=[Nodule].potentialDMAllocation.Structural
          StorageNDemandFunction Storage
            VariableReference NitrogenDemandSwitch: VariableName=[Nodule].nitrogenDemandSwitch
            VariableReference MaxNconc: VariableName=[Nodule].maximumNconc
      GenericOrgan Shell: IsAboveGround=true
        Constant NReallocationFactor: FixedValue=1
        Constant NRetranslocationFactor: FixedValue=0.5
        Constant MaximumNConc: FixedValue=0.045
        VariableReference CriticalNConc: VariableName=[Shell].MinimumNConc
        Constant MinimumNConc: FixedValue=0.01
        Constant DMRetranslocationFactor: FixedValue=0.1
        PhaseLookupValue NitrogenDemandSwitch: Start=StartPodDevelopment; End=EndPodDevelopment
          Constant: FixedValue=1
        BiomassRemoval BiomassRemovalDefaults: same as Replacements.Peanut.Leaf.BiomassRemovalDefaults
        PhaseLookup SenescenceRate
          PhaseLookupValue ReproductivePhase: Start=StartPodDevelopment; End=Maturity
            MinimumFunction Rate
              DivideFunction Fraction
                VariableReference TT: VariableName=[Phenology].ThermalTime
                SubtractFunction TTRemaining
                  ExpressionFunction ReproductiveTT
                    Expression=[Phenology].EarlyPodDevelopment.Target+[Phenology].EarlyGrainFilling.Target+[Phenology].MidGrainFilling.Target+[Phenology].LateGrainFilling.Target
                  ExpressionFunction ReproductiveTT1Complete
                    Expression=[Phenology].EarlyPodDevelopment.ProgressThroughPhase+[Phenology].EarlyGrainFilling.ProgressThroughPhase+[Phenology].MidGrainFilling.ProgressThroughPhase+[Phenology].LateGrainFilling.ProgressThroughPhase
              Constant One: FixedValue=1
        Constant DetachmentRateFunction: FixedValue=0; Units=/d
        Constant MaintenanceRespirationFunction: FixedValue=0; Units=0-1
        Constant DMConversionEfficiency: FixedValue=1; Units=0-1
        Constant DMReallocationFactor: FixedValue=0
        Constant RemobilisationCost: FixedValue=0
        Constant CarbonConcentration: FixedValue=0.4
        AddFunction FillingDuration
          VariableReference EarlyPodDevelopmentDuration: VariableName=[Phenology].EarlyPodDevelopment.Target
          VariableReference EarlyGrainFillingDuration: VariableName=[Phenology].EarlyGrainFilling.Target
          VariableReference MidGrainFillingDuration: VariableName=[Phenology].MidGrainFilling.Target
        BiomassDemand DMDemands
          MultiplyFunction Structural
            PhaseLookup DMDemandFunction
              PhaseLookupValue PodDevelopment: Start=StartPodDevelopment; End=EndPodDevelopment
                MultiplyFunction HIPodDemand
                  VariableReference AboveGroundWt: VariableName=[AboveGround].Wt
                  DivideFunction HarvestIndexIncrease
                    MaximumFunction OutstandingHarvestIndexIncrease
                      ExpressionFunction Increase: Expression=[Shell].PotentialHarvestIndex - [Shell].HarvestIndex
                      Constant Zero: FixedValue=0
                    SubtractFunction TTRemaining
                      ExpressionFunction ShellGrowthTT
                        Expression=[Phenology].EarlyPodDevelopment.Target+[Phenology].EarlyGrainFilling.Target+[Phenology].MidGrainFilling.Target
                      ExpressionFunction ShellGrowthTTComplete
                        Expression=[Phenology].EarlyPodDevelopment.ProgressThroughPhase+[Phenology].EarlyGrainFilling.ProgressThroughPhase+[Phenology].MidGrainFilling.ProgressThroughPhase
                  VariableReference ThermalTime: VariableName=[Phenology].ThermalTime
            Constant StructuralFraction: FixedValue=1
          Constant Metabolic: FixedValue=0
          StorageDMDemandFunction Storage
            SubtractFunction StorageFraction
              Constant One: FixedValue=1
              VariableReference StructuralFraction: VariableName=[Shell].DMDemands.Structural.StructuralFraction
        BiomassDemand NDemands
          MultiplyFunction Structural
            VariableReference MinNconc: VariableName=[Shell].minimumNconc
            VariableReference PotentialDMAllocation: VariableName=[Shell].potentialDMAllocation.Structural
          StorageNDemandFunction Storage
            VariableReference NitrogenDemandSwitch: VariableName=[Shell].nitrogenDemandSwitch
            VariableReference MaxNconc: VariableName=[Shell].maximumNconc
          Constant Metabolic: FixedValue=0
        RetranslocateNonStructural RetranslocateNitrogen
        BiomassDemand InitialWt
          Constant Structural: FixedValue=0; Units=g/m^2
          Constant Metabolic: FixedValue=0
          Constant Storage: FixedValue=0
        MultiplyFunction PotentialHarvestIndex
          VariableReference PodHarvestIndex: VariableName=[Pod].PotentialHarvestIndex
          Constant ShellFraction: FixedValue=0.28; Units=0-1
        DivideFunction HarvestIndex
          VariableReference ShellWt: VariableName=[Shell].Wt
          VariableReference AboveGroundWt: VariableName=[AboveGround].Wt
        Constant Photosynthesis: FixedValue=0
        VariableReference initialNConcFunction: VariableName=[Shell].MinimumNConc
        BiomassDemand dmDemandPriorityFactors
          Constant Structural: FixedValue=1
          Constant Metabolic: FixedValue=1
          Constant Storage: FixedValue=1
      GenericOrgan Stem: IsAboveGround=true
        Constant NReallocationFactor: FixedValue=1
        Constant NRetranslocationFactor: FixedValue=0.5
        PhaseLookup DMRetranslocationFactor
          PhaseLookupValue Vegetative: Start=Emergence; End=EndCanopyDevelopment
            Constant RetranslocationFactor: FixedValue=0
          PhaseLookupValue GrainFilling: Start=EndCanopyDevelopment; End=EndGrainFill
            Constant RetranslocationFactor: FixedValue=0.2
        LinearInterpolationFunction MaximumNConc
          XYPairs: X=[3, 4, 5]; Y=[0.025, 0.02, 0.015]
          VariableReference XValue: VariableName=[Phenology].Stage
        Constant MinimumNConc: FixedValue=0.006
        PhaseLookupValue NitrogenDemandSwitch: Start=Emergence; End=StartGrainFilling
          Constant: FixedValue=1
        BiomassRemoval BiomassRemovalDefaults: same as Replacements.Peanut.Leaf.BiomassRemovalDefaults
        PhaseLookup SenescenceRate
          PhaseLookupValue PostCanopyPhase: Start=EndCanopyDevelopment; End=Maturity
            MinimumFunction Rate
              DivideFunction Fraction
                VariableReference TT: VariableName=[Phenology].ThermalTime
                SubtractFunction TTRemaining
                  ExpressionFunction PostCanopyTT
                    Expression=[Phenology].EarlyPodDevelopment.Target+[Phenology].EarlyGrainFilling.Target+[Phenology].MidGrainFilling.Target+[Phenology].LateGrainFilling.Target
                  ExpressionFunction PostCanopyTTComplete
                    Expression=[Phenology].MidGrainFilling.ProgressThroughPhase+[Phenology].LateGrainFilling.ProgressThroughPhase
              Constant One: FixedValue=1
        Constant DetachmentRateFunction: FixedValue=0; Units=/d
        Constant MaintenanceRespirationFunction: FixedValue=0; Units=0-1
        Constant DMConversionEfficiency: FixedValue=1; Units=0-1
        Constant DMReallocationFactor: FixedValue=0
        VariableReference CriticalNConc: VariableName=[Stem].MinimumNConc
        Constant RemobilisationCost: FixedValue=0
        Constant CarbonConcentration: FixedValue=0.4
        BiomassDemand DMDemands
          MultiplyFunction Structural
            PhaseLookup Fraction
              PhaseLookupValue StemGrowthPhase: Start=Emergence; End=EndCanopyDevelopment
                Memo
                  This approach is based upon that used in [robertson_simulation_2002].
                Constant Fraction: FixedValue=0.9
              PhaseLookupValue PodAndGrainGrowth: Start=EndCanopyDevelopment; End=EndGrainFill
                Constant Fraction: FixedValue=0
            VariableReference DMDemand: VariableName=[Stem].PotentialGrowth
          Constant Metabolic: FixedValue=0
          MultiplyFunction Storage
            VariableReference DMDemand: VariableName=[Stem].PotentialGrowth
            SubtractFunction StorageFraction
              Constant One: FixedValue=1
              VariableReference StructuralFraction: VariableName=[Stem].DMDemands.Structural.Fraction
        BiomassDemand NDemands
          MultiplyFunction Structural
            VariableReference MinNconc: VariableName=[Stem].minimumNconc
            VariableReference PotentialDMAllocation: VariableName=[Stem].potentialDMAllocation.Structural
          MultiplyFunction Metabolic
            SubtractFunction MetabolicNconc
              VariableReference CritNconc: VariableName=[Stem].criticalNConc
              VariableReference MinNconc: VariableName=[Stem].minimumNconc
            VariableReference PotentialDMAllocation: VariableName=[Stem].potentialDMAllocation.Structural
          StorageNDemandFunction Storage
            VariableReference NitrogenDemandSwitch: VariableName=[Stem].nitrogenDemandSwitch
            VariableReference MaxNconc: VariableName=[Stem].maximumNconc
        PartitionFractionDemandFunction PotentialGrowth
          PhaseLookup PartitionFraction
            PhaseLookupValue StemGrowthPhase: Start=Emergence; End=EndPodDevelopment
              Constant StemFraction: FixedValue=0.4
            PhaseLookupValue GrainFilling: Start=EndPodDevelopment; End=EndGrainFill
              Constant StemFraction: FixedValue=0
        RetranslocateNonStructural RetranslocateNitrogen
        BiomassDemand InitialWt
          Constant Structural: FixedValue=0; Units=g/m^2
          Constant Metabolic: FixedValue=0
          Constant Storage: FixedValue=0
        Constant Photosynthesis: FixedValue=0
        VariableReference initialNConcFunction: VariableName=[Stem].MinimumNConc
        BiomassDemand dmDemandPriorityFactors
          Constant Structural: FixedValue=1
          Constant Metabolic: FixedValue=1
          Constant Storage: FixedValue=1
      CompositeBiomass AboveGround: DMDOfStructural=0.6
        Propertys=[[Leaf].Live, [Leaf].Dead, [Stem].Live, [Stem].Dead, [Grain].Live, [Grain].Dead, [Shell].Live, [Shell].Dead]
      CompositeBiomass BelowGround: Propertys=[[Root].Live, [Root].Dead, [Nodule].Live, [Nodule].Dead]; DMDOfStructural=0.6
      CompositeBiomass AboveGroundLive: Propertys=[[Leaf].Live, [Stem].Live, [Grain].Live, [Shell].Live]; DMDOfStructural=0.6
      CompositeBiomass Total: DMDOfStructural=0.6
        Propertys=[[Leaf].Live, [Leaf].Dead, [Stem].Live, [Stem].Dead, [Grain].Live, [Grain].Dead, [Shell].Live, [Shell].Dead, [Root].Live, [Root].Dead, [Nodule].Live, [Nodule].Dead]
      CompositeBiomass TotalLive: DMDOfStructural=0.6
        Propertys=[[Leaf].Live, [Stem].Live, [Grain].Live, [Shell].Live, [Root].Live, [Nodule].Live]
      CompositeBiomass TotalDead: DMDOfStructural=0.6
        Propertys=[[Leaf].Dead, [Stem].Dead, [Grain].Dead, [Shell].Dead, [Root].Dead, [Nodule].Dead]
      CompositeBiomass Pod: Propertys=[[Shell].Live, [Shell].Dead, [Grain].Live, [Grain].Dead]; DMDOfStructural=0.6
        DivideFunction HarvestIndex
          VariableReference PodWt: VariableName=[Pod].Wt
          VariableReference AboveGroundWt: VariableName=[AboveGround].Wt
        Constant PotentialHarvestIndex: FixedValue=0.5
          Memo
            This approach is based upon that used in [robertson_simulation_2002].
      CultivarFolder Cultivars
        Cultivar EarlyBunch
          Command:
            [Phenology].Vegetative.Target.FixedValue = 420
            [Phenology].EarlyFlowering.Target.FixedValue = 160
            [Phenology].LateGrainFilling.Target.EntireGrainfillPeriod.FixedValue = 1050
            [Phenology].EarlyGrainFilling.Target.FractionofGrainfilling.FixedValue = 0.6
            [Phenology].MidGrainFilling.Target.FractionofMidToLateGrainfilling.FixedValue=0.4
            [Grain].MaximumNConc.FixedValue = 0.067
            [Stem].PotentialGrowth.PartitionFraction.StemGrowthPhase.StemFraction.FixedValue = 0.5
            [Leaf].BranchingRate.XYPairs.X = 0,1,2,3,10,11
            [Leaf].BranchingRate.XYPairs.Y = 0,1,2,2.0,2.0,0.4
            [Leaf].ExtinctionCoefficient.XYPairs.X = 0, 335
            [Leaf].ExtinctionCoefficient.XYPairs.Y = 0.5, 0.5
        Cultivar VirginiaBunch
          Command:
            [Phenology].Vegetative.Target.FixedValue = 450
            [Phenology].EarlyFlowering.Target.FixedValue = 160
            [Phenology].LateGrainFilling.Target.EntireGrainfillPeriod.FixedValue = 1020
            [Phenology].EarlyGrainFilling.Target.FractionofGrainfilling.FixedValue = 0.40
            [Phenology].MidGrainFilling.Target.FractionofMidToLateGrainfilling.FixedValue=0.33
            [Grain].MaximumNConc.FixedValue = 0.067
            [Stem].PotentialGrowth.PartitionFraction.StemGrowthPhase.StemFraction.FixedValue = 0.5
            [Leaf].BranchingRate.XYPairs.X = 0,1,2,3,15,16
            [Leaf].BranchingRate.XYPairs.Y = 0,1,2,1.0,1.0,0
        Cultivar TMV2
          Command:
            [Phenology].Vegetative.Target.FixedValue = 390
            [Phenology].EarlyFlowering.Target.FixedValue = 160
            [Phenology].LateGrainFilling.Target.EntireGrainfillPeriod.FixedValue = 1020
            [Phenology].EarlyGrainFilling.Target.FractionofGrainfilling.FixedValue = 0.40
            [Phenology].MidGrainFilling.Target.FractionofMidToLateGrainfilling.FixedValue=0.33
            [Grain].MaximumNConc.FixedValue = 0.067
            [Stem].PotentialGrowth.PartitionFraction.StemGrowthPhase.StemFraction.FixedValue = 0.5
            [Leaf].BranchingRate.XYPairs.X = 0,1,2,3,15,16
            [Leaf].BranchingRate.XYPairs.Y = 0,1,2,1.0,1.0,0
        Cultivar Tapir: same as Replacements.Peanut.Cultivars.TMV2
        Cultivar VB97
          Command:
            [Phenology].Emerging.ShootLag=50
            [Phenology].Vegetative.Target.FixedValue = 390
            [Phenology].EarlyFlowering.Target.FixedValue = 100
            [Phenology].EarlyGrainFilling.Target.FractionofGrainfilling.FixedValue = 0.05
            [Phenology].LateGrainFilling.Target.EntireGrainfillPeriod.FixedValue = 1020
            [Phenology].MidGrainFilling.Target.FractionofMidToLateGrainfilling.FixedValue=0.33
            [Grain].MaximumNConc.FixedValue = 0.067
            [Stem].PotentialGrowth.PartitionFraction.StemGrowthPhase.StemFraction.FixedValue = 0.5
            [Leaf].BranchingRate.XYPairs.X = 0,1,2,3,15,16
            [Leaf].BranchingRate.XYPairs.Y = 0,1,2,2,2,0
            [Leaf].ExtinctionCoefficient.XYPairs.X = 5, 335
            [Leaf].ExtinctionCoefficient.XYPairs.Y = 0.2, 0.55
        Cultivar Florunner
          Command:
            [Phenology].Vegetative.Target.FixedValue = 400
            [Phenology].EarlyFlowering.Target.FixedValue = 160
            [Phenology].EarlyGrainFilling.Target.FractionofGrainfilling.FixedValue = 0.7
            [Phenology].LateGrainFilling.Target.EntireGrainfillPeriod.FixedValue = 1020
            [Phenology].MidGrainFilling.Target.FractionofMidToLateGrainfilling.FixedValue=0.20
            [Grain].MaximumNConc.FixedValue = 0.067
            [Stem].PotentialGrowth.PartitionFraction.StemGrowthPhase.StemFraction.FixedValue = 0.33
            [Leaf].BranchingRate.XYPairs.X = 0,1,2,3,15,16
            [Leaf].BranchingRate.XYPairs.Y = 0,1,2,2,2,0
            [Leaf].ExtinctionCoefficient.XYPairs.X = 0, 335
            [Leaf].ExtinctionCoefficient.XYPairs.Y = 0.6, 0.6
            [Leaf].SpecificArea.XYPairs.X = 0, 17, 21, 35
            [Leaf].SpecificArea.XYPairs.Y = .02, .02, .02, .02
            [Leaf].SenescenceRate.Reproductive.Rate.Modifier.FixedValue = 100
        Cultivar Redvale
          Command:
            [Phenology].Vegetative.Target.FixedValue = 420
            [Phenology].EarlyFlowering.Target.FixedValue = 200
            [Phenology].LateGrainFilling.Target.EntireGrainfillPeriod.FixedValue = 950
            [Phenology].EarlyGrainFilling.Target.FractionofGrainfilling.FixedValue = 0.5
            [Phenology].MidGrainFilling.Target.FractionofMidToLateGrainfilling.FixedValue=0.2
            [Grain].MaximumNConc.FixedValue = 0.067
            [Stem].PotentialGrowth.PartitionFraction.StemGrowthPhase.StemFraction.FixedValue = 0.5
            [Leaf].BranchingRate.XYPairs.X = 0,1,2,3,15,16
            [Leaf].BranchingRate.XYPairs.Y = 0,1,2,2.0,1.0,0
        Cultivar Taabinga
          Command:
            [Phenology].Vegetative.Target.FixedValue = 420
            [Phenology].EarlyFlowering.Target.FixedValue = 200
            [Phenology].LateGrainFilling.Target.EntireGrainfillPeriod.FixedValue = 950
            [Phenology].EarlyGrainFilling.Target.FractionofGrainfilling.FixedValue = 0.5
            [Phenology].MidGrainFilling.Target.FractionofMidToLateGrainfilling.FixedValue=0.20
            [Grain].MaximumNConc.FixedValue = 0.067
            [Stem].PotentialGrowth.PartitionFraction.StemGrowthPhase.StemFraction.FixedValue = 0.5
            [Leaf].BranchingRate.XYPairs.X = 0,1,2,3,15,16
            [Leaf].BranchingRate.XYPairs.Y = 0,1,2,2.0,1.0,0
      Constant MortalityRate: FixedValue=0
      BoundFunction AflotoxinPercentage
        Constant Lower: FixedValue=0
        Constant Upper: FixedValue=100
        AccumulateFunction AccumulatedValue: StartStageName=EndPodDevelopment; EndStageName=EndGrainFill; FractionRemovedOnCut=0; FractionRemovedOnHarvest=0; FractionRemovedOnGraze=0; FractionRemovedOnPrune=0
          MultiplyFunction DailyIncrease
            LinearInterpolationFunction TemperatureFactor
              XYPairs: X=[22, 30, 35]; Y=[0, 1, 0]
              Memo
                These parameters are overridden by cultivar parameter descriptions to capture the difference between individual cultivars in terms of their phenological development.  Responses shown here are only indicative.  See cultivar descriptions for more information.
              VariableReference XValue: VariableName=[Soil].Temperature.Value[1]
            LinearInterpolationFunction SoilWaterFactor
              XYPairs: X=[0, 0.2, 0.21, 1]; Y=[1, 1, 0, 0]
              Memo
                These parameters are overridden by cultivar parameter descriptions to capture the difference between individual cultivars in terms of their phenological development.  Responses shown here are only indicative.  See cultivar descriptions for more information.
              VariableReference XValue: VariableName=[Peanut].Root.FASW
            Constant: FixedValue=3
  Simulation ContinuousPeanut
    Clock: Start=1990-10-01; End=2021-06-01
    Summary summaryfile
    Weather: FileName=WeatherFiles\Kingaroy.met
    SoilArbitrator Soil Arbitrator
    MicroClimate: a_interception=0; b_interception=1; c_interception=0; d_interception=0; soil_albedo=0.23; SoilHeatFluxFraction=0.4; MinimumHeightDiffForNewLayer=0; NightInterceptionFraction=0.5; ReferenceHeight=2
    Zone paddock: Area=1; Slope=0; AspectAngle=0; Altitude=50
      Irrigation
      Manager Automatic irrigation based on water deficit
        FASW = 0
        WaterDeficit = 0
        AutoIrrigationOn = False
        FASWThreshold = 0.9
        FASWDepth = 900
```csharp
using Models.Interfaces;
using APSIM.Shared.Utilities;
using System.Xml.Serialization;
using Models;
using Models.PMF;
using Models.Soils;
using System.Text;
using System.Collections.Generic;
using Models.Core;
using System;
using Models.Soils.Nutrients;

namespace Models
{
    [Serializable] 
    public class Script : Model
    {
        [Link] private Zone zone;
        [Link] private Irrigation irrigation;
        [Link] private Soil soil;
        [Link]
        private IPhysical soilPhysical;
        [Link]
        private ISoilWater waterBalance;
        public double FASW { get; set; }
        public double WaterDeficit  { get; set; }
    
        
        [Description("Auto irrigation on?")]
        public bool AutoIrrigationOn { get; set; }

        [Description("Threshold fraction available water (0-1)")]
        public double FASWThreshold { get; set; }

        [Description("Soil depth (mm) to which fraction available water is calculated")]
        public double FASWDepth { get; set; }

        [EventSubscribe("DoManagement")]
        private void OnDoManagement(object sender, EventArgs e)
        {
            CalculateFASW();
            if (AutoIrrigationOn)
            {
                if (FASW < FASWThreshold)
                {
                    double amount = 10;
                    irrigation.Apply(WaterDeficit, depth: 0);
                }
            }
        }
        
        private void CalculateFASW()
        {
            double[] LL15 = MathUtilities.Multiply(soilPhysical.LL15, soilPhysical.Thickness);
            double[] DUL = MathUtilities.Multiply(soilPhysical.DUL, soilPhysical.Thickness);
        
            int nlayr = GetLayerIndex();
            double cumdep = MathUtilities.Sum(soilPhysical.Thickness, 0, nlayr, 0.0);

            double excess_fr = MathUtilities.Divide((cumdep - FASWDepth), soilPhysical.Thickness[nlayr], 0.0);

            // note that results may be strange if swdep < ll15
            double avail_sw = (MathUtilities.Sum(waterBalance.SWmm, 0, nlayr, 0.0)
                              - excess_fr * waterBalance.SWmm[nlayr])
                              - (MathUtilities.Sum(LL15, 0, nlayr, 0.0)
                              - excess_fr * LL15[nlayr]);


            double pot_avail_sw = (MathUtilities.Sum(DUL, 0, nlayr, 0.0)
                                  - excess_fr * DUL[nlayr])
                                  - (MathUtilities.Sum(LL15, 0, nlayr, 0.0)
                                  - excess_fr * LL15[nlayr]);

            FASW = MathUtilities.Divide(avail_sw, pot_avail_sw, 0.0);
            WaterDeficit = MathUtilities.Constrain(pot_avail_sw - avail_sw, 0.0, 100000);
        }

        private int GetLayerIndex()
        {
            double[] cumThickness = soilPhysical.ThicknessCumulative;
            for (int i = 1; i < cumThickness.Length; i++)
            {
                if (FASWDepth < cumThickness[i])
                    return i - 1;
            }
            
            return cumThickness.Length - 1;
        }

    }
}
```
      Fertiliser
      SurfaceOrganicMatter: InitialResidueName=maize; InitialResidueType=maize; InitialResidueMass=4500; InitialStandingFraction=0; InitialCPR=0; InitialCNR=55
      Report HarvestReport: EventNames=[Peanut].Harvesting
        VariableNames:
          [Clock].Today
          [Peanut].Pod.Wt
          [Peanut].AflotoxinPercentage
      Plant Peanut
      Manager SowingRule
        Crop = [Peanut]
        SowDate = 15-Nov
        CultivarName = Redvale
        SowingDepth = 50
        RowSpacing = 900
        Population = 15
```csharp
using APSIM.Shared.Utilities;
using Models.Utilities;
using Models.Soils;
using Models.PMF;
using Models.Core;
using System;

namespace Models
{
    [Serializable]
    public class Script : Model
    {
        [Link] Clock Clock;
        [Link] Fertiliser Fertiliser;
        [Link] Summary Summary;
        [Link] Soil Soil;
        
        [Description("Crop")]
        public IPlant Crop { get; set; }

        [Description("Sowing date (d-mmm)")]
        public string SowDate { get; set; }

        [Display(Type = DisplayType.CultivarName)]
        [Description("Cultivar to be sown")]
        public string CultivarName { get; set; }

        [Description("Sowing depth (mm)")]
        public double SowingDepth { get; set; }

        [Description("Row spacing (mm)")]
        public double RowSpacing { get; set; }

        [Description("Plant population (/m2)")]
        public double Population { get; set; }

        [EventSubscribe("DoManagement")]
        private void OnDoManagement(object sender, EventArgs e)
        {
            if (DateUtilities.WithinDates(SowDate, Clock.Today, SowDate))
            {
                Crop.Sow(population: Population, cultivar: CultivarName, depth: SowingDepth, rowSpacing: RowSpacing);    
            }
        }
    }
}
```
      Manager Harvest
```csharp
using Models.Soils.Nutrients;
using System;
using Models.Core;
using Models.PMF;
using Models.Soils;
using Models.Soils.Nutrients;
using Models.Utilities;
using APSIM.Shared.Utilities;

namespace Models
{
    [Serializable]
    public class Script : Model
    {
        [Link] Plant Peanut;

        [EventSubscribe("DoManagement")]
        private void OnDoManagement(object sender, EventArgs e)
        {
            if (Peanut.IsReadyForHarvesting)
            {
               Peanut.Harvest();
               Peanut.EndCrop();    
            }
        
        }
        
    }
}
```
      Soil: ASCOrder=Ferrosol; ASCSubOrder=Red; SoilType=?; Site=Wooroolin; NearestTown=Wooroolin; Region=Wide Bay and Burnett; State=Queensland; Country=Australia; ApsoilNumber=107; Latitude=-26.368; Longitude=151.775; YearOfSampling=0
        DataSource=CSIRO Tropical Crops and Pastures in collaboration with Agforce Queensland
        Comments=Changed SWCON from 0.3 to 0.9 based on local advice about this regions Ferrosols from Mike Bell, Graeme Wright, Yash Chauhan
        Physical
          Thickness  BD     AirDry  LL15   DUL    SAT
          150        1.349  0.14    0.28   0.357  0.461
          150        1.423  0.226   0.282  0.383  0.433
          300        1.383  0.307   0.307  0.398  0.448
          300        1.332  0.307   0.307  0.417  0.467
          300        1.33   0.307   0.307  0.418  0.468
          300        1.353  0.307   0.307  0.409  0.459
          300        1.359  0.307   0.307  0.407  0.457
          SoilCrop PeanutSoil: LL=[0.28, 0.282, 0.307, 0.32, 0.332, 0.34, 0.335]; KL=[0.06, 0.06, 0.06, 0.04, 0.04, 0.02, 0.01]; XF=[1, 1, 1, 1, 1, 1, 1]
        WaterBalance SoilWater: SummerDate=1-Nov; SummerU=6; SummerCona=3.5; WinterDate=1-Apr; WinterU=4; WinterCona=2.5; DiffusConst=40; DiffusSlope=16; Salb=0.12; CN2Bare=73; CNRed=20; CNCov=0.8; Thickness=[150, 150, 300, 300, 300, 300, 300]; SWCON=[0.9, 0.9, 0.9, 0.9, 0.9, 0.9, 0.9]
        Organic: FOMCNRatio=40
          Thickness  Carbon  SoilCNRatio  FBiom  FInert  FOM
          150        1.196   12           0.04   0.4     347.129
          150        1.014   12           0.02   0.6     270.344
          300        0.455   12           0.02   0.8     163.972
          300        0.299   12           0.02   1       99.4541
          300        0.195   12           0.01   1       60.322
          300        0.156   12           0.01   1       36.5871
          300        0.156   12           0.01   1       22.1912
        Chemical: Thickness=[150, 150, 300, 300, 300, 300, 300]; PH=[8.2, 8.5, 8.6, 8.6, 7.4, 5.3, 5.3]
          PH source: Unknown source or quality of data
        InitialWater Initial water: PercentMethod=0; FractionFull=1
        Sample Initial conditions: Depth=[0-180]; Thickness=[1800]; NH4=[1]; SWUnits=Volumetric; OCUnits=Total; PHUnits=Water
        Nutrient
        CERESSoilTemperature Temperature
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