Simulations: Version=139
  Memo Notes
    # Pinus Example Notes

    This example for Pinus is a hypothetical plantation with a soil from near Canberra and a climate from Lincoln, NZ. Daily rainfall has been increased by a factor of 2 using the ClimateController.

    Mortality is applied separately to treatments of factorial combinations of irrigation and N fertilization, and all treatmetns are thinned heavily at 16 years of age.

    Harvest is at 22 years, with a replanting the following June.

    A range of reports and graphs are provided.
  Replacements
    Report: EventNames=[Clock].DoReport
      VariableNames:
        [Clock].Today
        [Pinus].Age
        [Pinus].Population*10000 as stemsperha
        [Pinus].AboveGround.Wt
        [Pinus].AboveGround.N
        [Pinus].BelowGround.Wt
        [Pinus].Leaf.Dead.Wt
        [Pinus].Leaf.Live.Wt
        [Pinus].Leaf.Live.NConc
        [Pinus].Leaf.Wt
        [Pinus].Branch.Live.Wt
        [Pinus].Branch.Dead.Wt
        [Pinus].Branch.Wt
        [Pinus].Leaf.Detached.Wt
        [Pinus].Stem.Live.Wt
        [Pinus].Total.N
        [Pinus].Leaf.Live.NConc
        [Pinus].Cone.Live.NConc
        [Pinus].Branch.Live.NConc
        [Pinus].Stem.Live.NConc
        [Pinus].CoarseRoot.Live.NConc
        [Pinus].CoarseRoot.Live.Wt
        [Pinus].FineRoot.Live.NConc
        [Pinus].Leaf.Live.N*10 as LiveFoliarN
        [Pinus].Leaf.N*10 as TotalFoliarN
        [Pinus].Leaf.CoverGreen
        [Pinus].Leaf.SpecificLeafArea
        [Pinus].Leaf.LAI
        [Pinus].LAI
        [Pinus].Leaf.Fn
        [Pinus].Leaf.Fw
        [Pinus].TotalLive.Wt
        ([Pinus].Leaf.Transpiration + [Soil].SoilWater.Es + [MicroClimate].PrecipitationInterception) as ET
        [Pinus].IndividualTreeStemWt
        [Pinus].IndividualTreeLiveWt
        [Pinus].Stem.DBH
        [Pinus].Stem.Ht
        [Pinus].RootShootRatio
        [Pinus].Stem.Vol
        [Pinus].Stem.MAI
        [Pinus].Stem.BA
        [Pinus].Stem.BarkThickness
        [Pinus].Stem.BarkWt
        [Pinus].Stem.BAub
        [Pinus].Stem.DBHub
        [Pinus].Stem.MAIub
        [Pinus].Stem.VolBark
        [Pinus].Stem.Volub
        [Pinus].Stem.WoodDensity
        [Pinus].Stem.BarkDensity
        [Pinus].Stem.WoodWt
        [Pinus].Stem.Wt
        [Pinus].Stem.Live.Wt
        [Pinus].FineRoot.Wt
        [Pinus].CoarseRoot.Wt
        [Pinus].Cone.Wt
        [Pinus].TotalWoodBark.Wt
        sum ([SoilWater].PAWmm) as PAWmmTotal
        [Soil].SoilWater.SWmm[1] as SWmmD1
        [SoilWater].Evaporation
        [SoilWater].Drainage
        [SoilWater].Flux[1]
        [SoilWater].Flow[1]
        [SoilWater].Infiltration
        [SoilWater].LateralFlow[1]
        [SoilWater].LateralOutflow
        [SoilWater].Runoff
        [MicroClimate].PrecipitationInterception
        [Pinus].FineRoot.WaterUptake
        [Soil].SoilWater.SW[1] as SWD1
        [Soil].SoilWater.SW[2] as SWD2
        [Soil].SoilWater.SW[3] as SWD3
        [Soil].SoilWater.SW[4] as SWD4
        sum([Soil].SoilWater.SWmm) as SWmmTotal
        [Nutrient].NH4.ppm[1]
        [Nutrient].NO3.ppm[1]
        ([Nutrient].NO3.ppm + [Nutrient].NH4.ppm) as MineralNppm
        (sum ([Nutrient].NH4.kgha)+ sum ([Nutrient].NO3.kgha)) as MineralNTotalkgpha
        [Irrigation].IrrigationApplied
        [Weather].Rain
        [Pinus].Leaf.HeightFunction
    Report HarvestReport: EventNames=[Pinus].Harvesting
      VariableNames:
        [Clock].Today
        [Pinus].Stem.DBH
        [Pinus].Stem.Ht
        [Pinus].RootShootRatio
        [Pinus].Stem.Vol
        [Pinus].Stem.MAI
        [Pinus].Stem.BA
        [Pinus].Stem.BarkThickness
        [Pinus].Stem.BarkWt
        [Pinus].Stem.BAub
        [Pinus].Stem.DBHub
        [Pinus].Stem.MAIub
        [Pinus].Stem.VolBark
        [Pinus].Stem.Volub
        [Pinus].Stem.WoodDensity
    Report AnnualReport: EventNames=[Clock].EndOfYear
      VariableNames:
        [Clock].Today
        sum of ([Nutrient].MineralisedN[1]+[Nutrient].MineralisedN[2]+[Nutrient].MineralisedN[3]+[Nutrient].MineralisedN[4]) from [Clock].StartOfYear to [Clock].EndOfYear as NNMkgphaTop4DepthsAnnual
    Plant Pinus: PlantType=Pinus; IsAlive=false; IsEnding=false; DaysAfterEnding=0
      Memo
        Although Pinus trees have needles as their foliage, they are the Leaf component of the model to conform to PMF needs. Although the reproductive component of the model (called Cone here) is of minor interest for wood production, it can make up several percent of tree wieght and for which we found some data to guide calibration. Phenology is simple in this model and could become a focus for future model develompent, e.g. for tree breeding or pollen production. Allometric relationships for height (Ht, m), stem diameter (DBH, cm, over bark at 1.3 m height), and their derivatives (stem volume Vol m3/ha, and mean annual increment MAI m3/ha/year) were developed as a function of above-ground biomass based on observations. Root:shoot ratio is an emergent property of the model based on separate calibrations for root and shoot mass. Wood density remains pooly calibrated as few observations of whole tree wood density are available and based on stem analysis. So here wood density is an emergent proporty of the model, and observed versus predicted graphs of it  are included only as a general check that both wood volume and wood weight are correctly simulated.
      AccumulateFunction Age: StartStageName=Emergence; EndStageName=Old; FractionRemovedOnCut=0; FractionRemovedOnHarvest=0; FractionRemovedOnGraze=0; FractionRemovedOnPrune=0
        Constant day: FixedValue=0.00273973; Units=years
          Memo
            This converts days of growth to age in years.
      Constant MortalityRate: FixedValue=0
        Memo
          Mortality, and therefore its efect on population density (stocking), is set by the user of the model as a thinning operation.
      Phenology
        Memo
          Phenology is currently very simplistic in the Pinus model.
        StageBasedInterpolation StageCode: Stages=[Emergence, EndJuvenile, Maturity, Old]; Codes=[1, 2, 3, 4]; Proportional=true
        Constant ThermalTime: FixedValue=1; Units=^od
        GerminatingPhase Germinating: Start=Sowing; End=Germination
          Memo
            We make no distinction between sowing and transplanting in this model, but all sites used transplants not sown seeds. Initial weights are specified for Leaf (1 g/plant) and fine root (0.2 g/plant), which implies these are transplants. Germinating and emerging phenology phases are included in case they are needed by later users. No planting shock is included, but this could be considered in future versions, e.g. delay in commencement of root downward growth.
        EmergingPhase Emerging: ShootLag=1; ShootRate=0; Start=Germination; End=Emergence; TTForTimeStep=0
          VariableReference ThermalTime: VariableName=[Phenology].ThermalTime
        GenericPhase Juvenile: Start=Emergence; End=EndJuvenile
          Constant Progression: FixedValue=1; Units=^od
          Constant Target: FixedValue=365; Units=^o
        GenericPhase Mature: Start=EndJuvenile; End=Maturity
          Constant Progression: FixedValue=1; Units=^od
          Constant Target: FixedValue=1825; Units=^o
        GenericPhase Declining: Start=Maturity; End=Old
          Constant Progression: FixedValue=1; Units=^od
          Constant Target: FixedValue=27010; Units=^o
        EndPhase Old: Start=Old; End=Unused
          Constant ThermalTime: FixedValue=1; Units=^od
      OrganArbitrator Arbitrator
        BiomassTypeArbitrator DMArbitration
          Folder PotentialPartitioningMethods
            ReallocationMethod
            AllocateFixationMethod
            RetranslocationMethod
            SendPotentialDMAllocationsMethod
          Folder AllocationMethods
            NutrientConstrainedAllocationMethod
            DryMatterAllocationsMethod
          RelativeAllocation ArbitrationMethod
        BiomassTypeArbitrator NArbitration
          Folder PotentialPartitioningMethods
            ReallocationMethod
          Folder ActualPartitioningMethods
            AllocateFixationMethod
            RetranslocationMethod
          Folder AllocationMethods
            NitrogenAllocationsMethod
          RelativeAllocation ArbitrationMethod
          AllocateUptakesMethod
        WaterUptakeMethod
        NitrogenUptakeMethod
      CompositeBiomass AboveGround: DMDOfStructural=0.6
        Propertys=[[Branch].Live, [Branch].Dead, [Leaf].Live, [Leaf].Dead, [Stem].Live, [Stem].Dead, [Cone].Live, [Cone].Dead]
      CompositeBiomass BelowGround: DMDOfStructural=0.6
        Propertys=[[FineRoot].Live, [FineRoot].Dead, [CoarseRoot].Live, [CoarseRoot].Dead]
      CompositeBiomass TotalWoodBark: Propertys=[[Stem].Live, [Stem].Dead, [Branch].Live, [Branch].Dead]; DMDOfStructural=0.6
      CompositeBiomass Total: DMDOfStructural=0.6
        Propertys=[[Leaf].Live, [Leaf].Dead, [Stem].Live, [Stem].Dead, [Branch].Live, [Branch].Dead, [FineRoot].Live, [FineRoot].Dead, [CoarseRoot].Live, [CoarseRoot].Dead]
      CompositeBiomass TotalLive: DMDOfStructural=0.6
        Propertys=[[Leaf].Live, [Branch].Live, [Stem].Live, [FineRoot].Live, [CoarseRoot].Live, [Cone].Live]
      CompositeBiomass TotalDead: DMDOfStructural=0.6
        Propertys=[[Leaf].Dead, [Branch].Dead, [Stem].Dead, [FineRoot].Dead, [CoarseRoot].Dead, [Cone].Dead]
      DivideFunction IndividualTreeLiveWt
        VariableReference ABGWt: VariableName=[Pinus].Aboveground.Wt
        VariableReference Population: VariableName=[Pinus].Population
      DivideFunction IndividualTreeStemWt
        VariableReference StemWt: VariableName=[Pinus].Stem.Wt
        VariableReference Population: VariableName=[Pinus].Population
      GenericOrgan Cone: IsAboveGround=true
        Constant NReallocationFactor: FixedValue=0; Units=/d
        Constant NRetranslocationFactor: FixedValue=0.05; Units=/d
        PhaseLookupValue NitrogenDemandSwitch: Start=Emergence; End=Old
          Constant: FixedValue=1
        Constant DMRetranslocationFactor: FixedValue=0; Units=/d
        Constant SenescenceRate: FixedValue=0; Units=/d
        Constant MaximumNConc: FixedValue=0.01; Units=g/g
        Constant MinimumNConc: FixedValue=0.0014; Units=g/g
        Constant DetachmentRateFunction: FixedValue=0.05; Units=/d
        Constant MaintenanceRespirationFunction: FixedValue=0; Units=0-1
        Constant DMConversionEfficiency: FixedValue=1; Units=0-1
        RetranslocateNonStructural RetranslocateNitrogen
        BiomassRemoval BiomassRemovalDefaults
          OrganBiomassRemovalType Harvest: FractionLiveToRemove=0; FractionDeadToRemove=0; FractionLiveToResidue=1; FractionDeadToResidue=1
          OrganBiomassRemovalType Cut: FractionLiveToRemove=1; FractionDeadToRemove=0; FractionLiveToResidue=0; FractionDeadToResidue=0
          OrganBiomassRemovalType Prune: FractionLiveToRemove=0; FractionDeadToRemove=0; FractionLiveToResidue=0.6; FractionDeadToResidue=0
          OrganBiomassRemovalType Thin: FractionLiveToRemove=0; FractionDeadToRemove=0; FractionLiveToResidue=0.05; FractionDeadToResidue=0.05
        Constant DMReallocationFactor: FixedValue=0; Units=/d
        VariableReference CriticalNConc: VariableName=[Cone].MinimumNConc
        Constant RemobilisationCost: FixedValue=0
        Constant CarbonConcentration: FixedValue=0.52; Units=g/g
        BiomassDemandAndPriority DMDemands
          MultiplyFunction Structural
            PartitionFractionDemandFunction DMDemandFunction
              LinearInterpolationFunction PartitionFraction
                XYPairs: X=[0, 1000, 10000, 20000, 50000]; Y=[0, 0, 0, 0.004, 0.015]
                VariableReference XValue: VariableName=[Pinus].IndividualTreeLiveWt
            Constant StructuralFraction: FixedValue=0.99; Units=0-1
          Constant Metabolic: FixedValue=0
          StorageDMDemandFunction Storage
            SubtractFunction StorageFraction
              Constant One: FixedValue=1
              VariableReference StructuralFraction: VariableName=[Cone].DMDemands.Structural.StructuralFraction
          Constant QStructuralPriority: FixedValue=1
          Constant QMetabolicPriority: FixedValue=1
          Constant QStoragePriority: FixedValue=1
        BiomassDemandAndPriority NDemands
          MultiplyFunction Structural
            VariableReference MinNconc: VariableName=[Cone].minimumNconc
            VariableReference PotentialDMAllocation: VariableName=[Cone].potentialDMAllocation.Structural
          MultiplyFunction Metabolic
            SubtractFunction MetabolicNconc
              VariableReference CritNconc: VariableName=[Cone].criticalNConc
              VariableReference MinNconc: VariableName=[Cone].minimumNconc
            VariableReference PotentialDMAllocation: VariableName=[Cone].potentialDMAllocation.Structural
          StorageNDemandFunction Storage
            VariableReference NitrogenDemandSwitch: VariableName=[Cone].nitrogenDemandSwitch
            VariableReference MaxNconc: VariableName=[Cone].maximumNconc
          Constant QStructuralPriority: FixedValue=1
          Constant QMetabolicPriority: FixedValue=1
          Constant QStoragePriority: FixedValue=1
        BiomassDemand InitialWt
          Constant Structural: FixedValue=0; Units=g
          Constant Metabolic: FixedValue=0
          Constant Storage: FixedValue=0
        Constant Photosynthesis: FixedValue=0
        VariableReference initialNConcFunction: VariableName=[Cone].MinimumNConc
      PerennialLeaf Leaf: MaintenanceRespiration=0; GrowthRespiration=0; Albedo=0.15; Gsmax350=0.006; R50=150; LAI=0; Height=0; FRGR=0; PotentialEP=0; WaterDemand=0
        ExpressionFunction CO2internal: Expression=(163 - [IWeather].MeanT)/(5 - 0.1*[IWeather].MeanT)
          Memo
            Concentrations of CO2 change enough over two or more decades to noticably affect simulated Pinus growth within even one  plantation cycle, as the rotation length for most Pinus plantations is commonly more than one decade. For such simulations we recommend specification in the met file of either the average CO2 during the simulation (if more 1-3 decades) or daily values for longer simulations.

            Standard PMF use of CO2 concentration data is provided here.
        DivideFunction StomatalConductanceCO2Modifier
          VariableReference FCO2: VariableName=[Leaf].Photosynthesis.FCO2
          ExpressionFunction RelativeCO2Gradient
            Expression=([IWeather].CO2 - [Leaf].CO2internal)/(350 - [Leaf].CO2internal)
        MultiplyFunction InitialWtFunction
          Constant InitialPlantWt: FixedValue=1; Units=g/plant
            Memo
              This value is nominally low to reflect the dry weight of leaves on a transplanted seedling.
          VariableReference Population: VariableName=[Plant].Population
        Constant LaiDeadFunction: FixedValue=0; Units=m^2/m^2
        MinimumFunction FRGRFunction
          Memo
            The FRGRFunction, as used to calculate water uptake, is sensitive to stresses of temperature, N status and vpd.
          VariableReference FT: VariableName=[Leaf].Photosynthesis.FT.FTDaytime
          VariableReference FN: VariableName=[Leaf].Photosynthesis.FN
          VariableReference FVPD: VariableName=[Leaf].Photosynthesis.FVPD
        ExpressionFunction ExtinctionCoefficient
          Expression=([ExtinctionCoefficient].KMatureTrees+([ExtinctionCoefficient].KYoungTrees-[ExtinctionCoefficient].KMatureTrees)*Exp((0-2)*([Pinus].Leaf.LAI/[ExtinctionCoefficient].LAIIntermediateK)^[ExtinctionCoefficient].ShapeCurve))
          Memo
            Typical extinction coefficients for other plant types are provided here.
          Constant KYoungTrees: FixedValue=0.5
          Constant KMatureTrees: FixedValue=0.5
          Constant LAIIntermediateK: FixedValue=0.7
          Constant ShapeCurve: FixedValue=2
        Constant ExtinctionCoefficientDead: FixedValue=0.5
        Constant MaximumNConc: FixedValue=0.02; Units=g/g
          Memo
            Maximum and minimum N concentration data were guided by those available in some datasets.
        Constant MinimumNConc: FixedValue=0.012; Units=g/g
        Constant NReallocationFactor: FixedValue=0.5; Units=/d
          Memo
            A value of zero assumes there is no N reallocation. The value of 0.5 used here ensures rapid reallocation.
        WeightedTemperatureFunction SenescenceRate: MaximumTemperatureWeighting=0
          Memo
            A zero senescence rate is not assumed here.
          XYPairs: X=[-5, -2, 0, 2, 2.1]; Y=[0, 0, 0, 0, 0]
        BiomassRemoval BiomassRemovalDefaults
          Memo
            Values in this table reflect the live and dead fractions that are either removed from the system or transferred to the residue pool. Harvest, Cut and Prune methods will affect these values, but default values assume for Harvest assume delimbing at the stump.
          OrganBiomassRemovalType Harvest: FractionLiveToRemove=0; FractionDeadToRemove=0; FractionLiveToResidue=0.99; FractionDeadToResidue=0.99
          OrganBiomassRemovalType Cut: FractionLiveToRemove=0.8; FractionDeadToRemove=0; FractionLiveToResidue=0; FractionDeadToResidue=0
          OrganBiomassRemovalType Prune: FractionLiveToRemove=0; FractionDeadToRemove=0; FractionLiveToResidue=0.6; FractionDeadToResidue=0
          OrganBiomassRemovalType Thin: FractionLiveToRemove=0; FractionDeadToRemove=0; FractionLiveToResidue=0.05; FractionDeadToResidue=0.05
        Constant DMConversionEfficiency: FixedValue=1; Units=g/g
        Constant LeafDetachmentTime: FixedValue=14; Units=d
          Memo
            A value here is the number of days between senescence and detachment. A value of 14 days is assumed.
        Constant DetachmentRateFunction: FixedValue=0; Units=/d
          Memo
            A value for DetachmentRateFunction is required in Leaf, Branch, Stem and CoarseRoot components of the model, but a zero value means that immediate detachment has been triggered. A non-zero option might be useful in the future for defining some genotypes.
        Constant DMRetranslocationFactor: FixedValue=0; Units=/d
          Memo
            A value of zero assumes there is no dry matter retranslocation.
        Constant NRetranslocationFactor: FixedValue=0.05; Units=/d
          Memo
            A value of zero assumes there is no N retranslocation. The value of 0.05 used here leads to slow retranslocation.
        RUEModel Photosynthesis
          Memo
            The value of RUE for tree crops is generally in the range 1.3-1.7. Here a value of 1.3 is used, and modified by stresses for temperature, vpd, nitrogen, water and CO2.
          Constant RUE: FixedValue=1.3; Units=g/MJ
            Memo
              Aboveground RUE for Gliricidia was measured as 1.06 g/MJ by [harrington1995radiation]. Adding c. 0.3 for belowground allocation provides a value of 1.4 g/MJ.
          MinimumFunction FT
            WeightedTemperatureFunction FTDaytime: MaximumTemperatureWeighting=0.75
              XYPairs: X=[2, 13, 14, 32]; Y=[0, 1, 1, 0]
            WeightedTemperatureFunction FTFrost: MaximumTemperatureWeighting=0
              XYPairs: X=[-5, -2, -1, 0, 1, 2, 3, 4, 7]; Y=[0, 0, 0, 0, 0, 0, 0.5, 0.8, 1]
          LinearInterpolationFunction FVPD
            XYPairs: X=[0, 10, 50]; Y=[1, 1, 0]
            VariableReference XValue: VariableName=[Leaf].Photosynthesis.VPD
          LinearInterpolationFunction FN
            XYPairs: X=[0, 1, 1.5]; Y=[0, 1, 1]
            VariableReference XValue: VariableName=[Leaf].Fn
          LinearInterpolationFunction FW
            XYPairs: X=[0, 1, 1.5]; Y=[0, 1, 1]
            VariableReference XValue: VariableName=[Leaf].Fw
          RUECO2Function FCO2: PhotosyntheticPathway=C3
          VariableReference RadnInt: VariableName=[Leaf].RadiationIntercepted
        Constant MinimumLAI: FixedValue=0.01; Units=m^2/m^2
        MultiplyFunction SpecificLeafAreaFunction
          Memo
            Some SLA data were for some of the datasets inlcuded in this validation, but rarely accurately enough to estimate  average canopy SLA. So high model skill for this attribute cannot be expeced.
          LinearInterpolationFunction CO2Modifier
            XYPairs: X=[350, 850]; Y=[1, 0.8]
            VariableReference XValue: VariableName=[IWeather].CO2
          ExpressionFunction SLAPotential: Expression=0.06-[Pinus].Leaf.Wt*0.0000003
        LinearInterpolationFunction LeafResidenceTime
          Memo
            This function specifies that lead residence time increases with age. Values are mainly based on [cremer1992relations] and [beets1987specific].
          XYPairs: X=[0, 1, 2, 3, 6, 9]; Y=[350, 380, 450, 500, 550, 650]
          VariableReference XValue: VariableName=[Pinus].Age
        LinearInterpolationFunction SenescenceRate2 (disabled)
          XYPairs: X=[0, 10, 20]; Y=[0.1, 0.1, 0]
          Memo
            This function specifies that lead residence time increases with age. Values are based on [laclau2009influence].
          VariableReference XValue: VariableName=[MicroClimate].SurfaceRS
        LinearInterpolationFunction FLAI
          Memo
            SenescenceRate was set to zero above, but here instead leaves are killed on a daily basis if stresses of temperature, nitrogen, water and LAI are high enough. Future model improvements could consider altering the senescence rate using these stresses as cummulative functions, but I have so far not been able to do so.
          XYPairs: X=[0, 11, 13]; Y=[1, 1, 0]
          VariableReference XValue: VariableName=[Leaf].LAI
        MinimumFunction LeafKillFractionFactor
          VariableReference FT (disabled): VariableName=[Leaf].Photosynthesis.FT
          VariableReference FN (disabled): VariableName=[Leaf].Photosynthesis.FN
          VariableReference FW (disabled): VariableName=[Leaf].Photosynthesis.FW
          VariableReference FLAI: VariableName=[Leaf].FLAI
        ExpressionFunction LeafKillFraction: Expression=0.0+0.0*(1-[Leaf].LeafKillFractionFactor)
        MultiplyFunction LeafDevelopmentRate
          Constant LDR: FixedValue=1; Units=0-1
          WeightedTemperatureFunction FT: MaximumTemperatureWeighting=1
            XYPairs: X=[8, 26, 33, 34]; Y=[0, 1, 1, 0]
              Memo
                This is an assumed and tuned function of Leaf development rate in relation to weighted air temperature.
        Constant CarbonConcentration: FixedValue=0.52; Units=g/g
          Memo
            This value is wtihin the range of 0.50-0.53 reported by [beets2018carbon] for _P. radiata_ foliage.
        ExpressionFunction HeightFunction: Expression=[Stem].Ht*1000
          Memo
            This converts stem height in m to mm for use else where in the model, particularly in relation to competing vegetation.
        BiomassDemand DMDemands
          Memo
            DM demands are set in a similar ways for each organ, but with different values: structural (default specified), metabolic (value = 0), and storage functions (1 - structural). Values measured range from about 5 to 50% for Pinus leaves ([quentin2015non]), which also covers the range of 1-20% for other species and plant parts ([hoch2003non]). Metabolic demand is set to zero, because RUE is a value for net growth for which a respiration calculation is not needed. These values may become an important focus if one attempts to use the model for coppicing, as is already the case in several other APSIM models, e.g. lucerne and gliricidia.
          MultiplyFunction Structural
            PartitionFractionDemandFunction DMDemandFunction
              LinearInterpolationFunction PartitionFraction
                XYPairs: X=[0, 1000, 10000, 20000, 40000, 80000, 160000]; Y=[0.2, 0.2, 0.2, 0.3, 0.4, 0.4, 0.2]
                VariableReference XValue: VariableName=[Pinus].IndividualTreeLiveWt
            Constant StructuralFraction: FixedValue=0.99; Units=0-1
          Constant Metabolic: FixedValue=0
          Constant Storage: FixedValue=0
        BiomassDemand NDemands
          Memo
            N demands are set in a similar ways to DM demands, which are described above.
          MultiplyFunction Structural
            VariableReference MinNconc: VariableName=[Leaf].minimumNconc
            VariableReference PotentialDMAllocation: VariableName=[Leaf].potentialDMAllocation.Structural
          Constant Metabolic: FixedValue=0
          StorageNDemandFunction Storage
            VariableReference MaxNconc: VariableName=[Leaf].MaximumNconc
            Constant NitrogenDemandSwitch: FixedValue=1
      GenericOrgan Branch: IsAboveGround=true
        Constant NReallocationFactor: FixedValue=0; Units=/d
        Constant NRetranslocationFactor: FixedValue=0.05; Units=/d
        PhaseLookupValue NitrogenDemandSwitch: Start=Emergence; End=Old
          Constant: FixedValue=1
        Constant DMRetranslocationFactor: FixedValue=0; Units=/d
        Constant SenescenceRate: FixedValue=0; Units=/d
        Constant MaximumNConc: FixedValue=0.006; Units=g/g
        Constant MinimumNConc: FixedValue=0.003; Units=g/g
        Constant DetachmentRateFunction: FixedValue=0; Units=/d
        Constant MaintenanceRespirationFunction: FixedValue=0; Units=0-1
        Constant DMConversionEfficiency: FixedValue=1; Units=0-1
        BiomassRemoval BiomassRemovalDefaults
          OrganBiomassRemovalType Harvest: FractionLiveToRemove=0; FractionDeadToRemove=0; FractionLiveToResidue=1; FractionDeadToResidue=1
          OrganBiomassRemovalType Cut: FractionLiveToRemove=0.8; FractionDeadToRemove=0; FractionLiveToResidue=0; FractionDeadToResidue=0
          OrganBiomassRemovalType Prune: FractionLiveToRemove=0; FractionDeadToRemove=0; FractionLiveToResidue=0.6; FractionDeadToResidue=0
          OrganBiomassRemovalType Thin: FractionLiveToRemove=0; FractionDeadToRemove=0; FractionLiveToResidue=0.05; FractionDeadToResidue=0.05
        Constant DMReallocationFactor: FixedValue=0; Units=/d
        VariableReference CriticalNConc: VariableName=[Branch].MinimumNConc
        Constant RemobilisationCost: FixedValue=0
        Constant CarbonConcentration: FixedValue=0.51; Units=g/g
        BiomassDemandAndPriority DMDemands
          MultiplyFunction Structural
            PartitionFractionDemandFunction DMDemandFunction
              LinearInterpolationFunction PartitionFraction
                XYPairs: X=[0, 1000, 10000, 20000, 40000]; Y=[0.15, 0.3, 0.3, 0.3, 0.1]
                VariableReference XValue: VariableName=[Pinus].IndividualTreeLiveWt
            Constant StructuralFraction: FixedValue=0.99; Units=0-1
          Constant Metabolic: FixedValue=0
          StorageDMDemandFunction Storage
            SubtractFunction StorageFraction
              Constant One: FixedValue=1
              VariableReference StructuralFraction: VariableName=[Branch].DMDemands.Structural.StructuralFraction
          Constant QStructuralPriority: FixedValue=1
          Constant QMetabolicPriority: FixedValue=1
          Constant QStoragePriority: FixedValue=1
        BiomassDemandAndPriority NDemands
          Memo
            DM or N demands here are set in a similar way to those described above for the Leaf organ.
          MultiplyFunction Structural
            VariableReference MinNconc: VariableName=[Branch].minimumNconc
            VariableReference PotentialDMAllocation: VariableName=[Branch].potentialDMAllocation.Structural
          MultiplyFunction Metabolic
            SubtractFunction MetabolicNconc
              VariableReference CritNconc: VariableName=[Branch].criticalNConc
              VariableReference MinNconc: VariableName=[Branch].minimumNconc
            VariableReference PotentialDMAllocation: VariableName=[Branch].potentialDMAllocation.Structural
          StorageNDemandFunction Storage
            VariableReference NitrogenDemandSwitch: VariableName=[Branch].nitrogenDemandSwitch
            VariableReference MaxNconc: VariableName=[Branch].maximumNconc
          Constant QStructuralPriority: FixedValue=1
          Constant QMetabolicPriority: FixedValue=1
          Constant QStoragePriority: FixedValue=1
        RetranslocateNonStructural RetranslocateNitrogen
        BiomassDemand InitialWt
          Constant Structural: FixedValue=0; Units=g
          Constant Metabolic: FixedValue=0
          Constant Storage: FixedValue=0
        Constant Photosynthesis: FixedValue=0
        VariableReference initialNConcFunction: VariableName=[Branch].MinimumNConc
      GenericOrgan Stem: IsAboveGround=true
        BiomassDemand InitialWt
          Constant Structural: FixedValue=0; Units=g
          Constant Metabolic: FixedValue=0
          Constant Storage: FixedValue=0
        Constant NReallocationFactor: FixedValue=0; Units=/d
        Constant NRetranslocationFactor: FixedValue=0.05; Units=/d
        PhaseLookupValue NitrogenDemandSwitch: Start=Emergence; End=Old
          Constant: FixedValue=1
        Constant DMRetranslocationFactor: FixedValue=0; Units=/d
        LinearInterpolationFunction SenescenceRate
          XYPairs: X=[0, 2500, 5000, 10000, 20000, 40000, 80000, 160000]; Y=[0, 0, 0, 0, 0, 0, 0, 0]
          VariableReference XValue: VariableName=[Pinus].Stem.WoodWt
        Constant MaximumNConc: FixedValue=0.004; Units=g/g
          Memo
            Branch, stem and coarse root minimum N concentrations are based on [raymond2000effect].
        Constant MinimumNConc: FixedValue=0.002; Units=g/g
        Constant DetachmentRateFunction: FixedValue=0.01; Units=/d
        Constant MaintenanceRespirationFunction: FixedValue=0; Units=0-1
        Constant DMConversionEfficiency: FixedValue=1; Units=0-1
        BiomassRemoval BiomassRemovalDefaults
          OrganBiomassRemovalType Harvest: FractionLiveToRemove=1; FractionDeadToRemove=1; FractionLiveToResidue=0; FractionDeadToResidue=0
          OrganBiomassRemovalType Cut: FractionLiveToRemove=0.8; FractionDeadToRemove=0; FractionLiveToResidue=0; FractionDeadToResidue=0
          OrganBiomassRemovalType Prune: FractionLiveToRemove=0; FractionDeadToRemove=0; FractionLiveToResidue=0.6; FractionDeadToResidue=0
          OrganBiomassRemovalType Thin: FractionLiveToRemove=0; FractionDeadToRemove=0; FractionLiveToResidue=0.05; FractionDeadToResidue=0.05
        Constant DMReallocationFactor: FixedValue=0; Units=/d
        VariableReference CriticalNConc: VariableName=[Stem].MinimumNConc
        Constant CarbonConcentration: FixedValue=0.51; Units=g/g
        Constant RemobilisationCost: FixedValue=0
        RetranslocateNonStructural RetranslocateNitrogen
        Constant Photosynthesis: FixedValue=0
        VariableReference initialNConcFunction: VariableName=[Stem].MinimumNConc
        BiomassDemandAndPriority DMDemands
          MultiplyFunction Structural
            PartitionFractionDemandFunction DMDemandFunction
              LinearInterpolationFunction PartitionFraction
                XYPairs: X=[0, 2000, 10000, 20000, 30000, 60000, 160000]; Y=[0.1, 0.15, 0.4, 0.6, 0.999, 0.999, 0.9999]
                VariableReference XValue: VariableName=[Pinus].IndividualTreeLiveWt
            Constant StructuralFraction: FixedValue=0.99; Units=0-1
          Constant Metabolic: FixedValue=0
          StorageDMDemandFunction Storage
            SubtractFunction StorageFraction
              Constant One: FixedValue=1
              VariableReference StructuralFraction: VariableName=[Stem].DMDemands.Structural.StructuralFraction
          Constant QStructuralPriority: FixedValue=1
          Constant QMetabolicPriority: FixedValue=1
          Constant QStoragePriority: FixedValue=1
        BiomassDemandAndPriority NDemands
          MultiplyFunction Structural
            VariableReference MinNconc: VariableName=[Stem].minimumNconc
            VariableReference PotentialDMAllocation: VariableName=[Stem].potentialDMAllocation.Structural
          MultiplyFunction Metabolic
            SubtractFunction MetabolicNconc
              VariableReference CritNconc: VariableName=[Stem].criticalNConc
              VariableReference MinNconc: VariableName=[Stem].minimumNconc
            VariableReference PotentialDMAllocation: VariableName=[Stem].potentialDMAllocation.Structural
          StorageNDemandFunction Storage
            VariableReference NitrogenDemandSwitch: VariableName=[Stem].nitrogenDemandSwitch
            VariableReference MaxNconc: VariableName=[Stem].maximumNconc
          Constant QStructuralPriority: FixedValue=1
          Constant QMetabolicPriority: FixedValue=1
          Constant QStoragePriority: FixedValue=1
        Memo Memo1
          Stem metrics useful for plantation forestry are derive here from stem weight using an allometric relationship with stem diameter at breast height (DBH over bark). Basal area (BA, sum of areas of stems in m2 per ha) and stem height (Ht) depends on DBH, and volume (Vol over bark) is provide (g per ha) as a function of both Ht and BA. However, underbark metrics were also required, which necessitated the division of stem weight and volume into wood and bark components using, the volume component, which depends on bark thickness. All these functions are empirical and calibrated to provide adequate model skill. Finally, wood and bark densities are calculated. Tree stems are not exactly conical, and bark thickness and wood and bark densities vary radially and with height up the stem, with age, and between trees due to inter-tree competition and growth rate. All parameters, and even functions, can be redefined within genotype (cultivar) settings.
        LessThanFunction DBH
          VariableReference IndStemWt: VariableName=[Pinus].IndividualTreeStemWt
          Constant MinimumIndStemWt: FixedValue=1000
          Constant ElseMinimum: FixedValue=2
          ExpressionFunction DBHEquation: Expression=-3.24438+(0.824527*[Pinus].IndividualTreeStemWt^0.302565)
        LessThanFunction BarkThickness
          VariableReference Criterion: VariableName=[Pinus].IndividualTreeStemWt
          Constant LowLimit: FixedValue=10000
          Constant Zero: FixedValue=0
          LinearInterpolationFunction BarkThickness
            VariableReference XValue: VariableName=[Pinus].Stem.DBH
            XYPairs: X=[0, 8, 12, 16, 20, 24, 28, 40, 80]; Y=[0, 0.2, 0.5, 0.8, 1, 1.2, 1.4, 1.6, 1.8]
        LessThanFunction DBHub
          VariableReference Criterion: VariableName=[Pinus].IndividualTreeStemWt
          Constant LowLimit: FixedValue=100
          Constant Zero: FixedValue=0
          ExpressionFunction DBHEquation: Expression=[Pinus].Stem.DBH-[Pinus].Stem.BarkThickness*2
        ExpressionFunction BA: Expression=(([Pinus].Stem.DBH/2)^2)*3.14159*[Pinus].Population
        ExpressionFunction BAub: Expression=([Pinus].Stem.DBHub/2)^2*3.14159*[Pinus].Population
        MaximumFunction Ht
          Constant MinimumHeight: FixedValue=1; Units=m
          ExpressionFunction HeightFunction
            Expression=-4.2+(0.5*[Pinus].Stem.DBH^1.0948)+(0.642694*([Pinus].Population*10000)^0.2924)
        LessThanFunction Vol
          VariableReference Criterion: VariableName=[Pinus].IndividualTreeStemWt
          Constant LowLimit: FixedValue=10000
          Constant Zero: FixedValue=0
          ExpressionFunction VolumeEquation
            Expression=[Pinus].Stem.Ht*[Pinus].Stem.BA*(0.942*(([Pinus].Stem.Ht-1.4)^-1.161)+0.317)
        ExpressionFunction VolBark
          Expression=(([Pinus].Stem.Ht)*(([Pinus].Stem.DBH/200)^2)*3.14159/3*[Pinus].Population*10000)-(([Pinus].Stem.Ht)*(([Pinus].Stem.DBHub/200)^2)*3.14159/3*[Pinus].Population*10000)
        ExpressionFunction Volub: Expression=[Pinus].Stem.Vol-[Pinus].Stem.VolBark*0.9
        ExpressionFunction MAI: Expression=[Pinus].Stem.Vol/[Pinus].Age
        ExpressionFunction MAIub: Expression=[Pinus].Stem.Volub/[Pinus].Age
        LessThanFunction WoodWt
          VariableReference Criterion: VariableName=[Pinus].IndividualTreeStemWt
          Constant LowLimit: FixedValue=100
          Constant Zero: FixedValue=0
          MultiplyFunction WoodWt
            LinearInterpolationFunction WoodWtFactor
              VariableReference XValue: VariableName=[Pinus].Stem.Live.Wt
              XYPairs: X=[0, 2000, 10000, 20000, 100000]; Y=[0.8, 0.9, 0.93, 0.95, 0.98]
            VariableReference StemWt: VariableName=[Pinus].Stem.Live.Wt
        LessThanFunction BarkWt
          VariableReference Criterion: VariableName=[Pinus].IndividualTreeStemWt
          Constant LowLimit: FixedValue=10
          Constant Zero: FixedValue=0
          ExpressionFunction BarkWt: Expression=[Pinus].Stem.Live.Wt-[Pinus].Stem.WoodWt
        LessThanFunction BarkDensity
          VariableReference Criterion: VariableName=[Pinus].IndividualTreeStemWt
          Constant LowLimit: FixedValue=10000
          Constant Zero: FixedValue=0
          ExpressionFunction WoodDensity: Expression=[Pinus].Stem.BarkWt*10/[Pinus].Stem.VolBark
        LessThanFunction WoodDensity
          VariableReference Criterion: VariableName=[Pinus].IndividualTreeStemWt
          Constant LowLimit: FixedValue=10000
          Constant Zero: FixedValue=0
          ExpressionFunction WoodDensity: Expression=[Pinus].Stem.WoodWt*10/[Pinus].Stem.Volub
      GenericOrgan CoarseRoot: IsAboveGround=true
        Constant NReallocationFactor: FixedValue=0; Units=/d
        Constant NRetranslocationFactor: FixedValue=0.05; Units=/d
        PhaseLookupValue NitrogenDemandSwitch: Start=Emergence; End=Old
          Constant: FixedValue=1
        Constant DMRetranslocationFactor: FixedValue=0; Units=0-1
        Constant SenescenceRate: FixedValue=0; Units=/d
        Constant MaximumNConc: FixedValue=0.008; Units=g/g
        Constant MinimumNConc: FixedValue=0.0012; Units=g/g
        Constant DetachmentRateFunction: FixedValue=0; Units=/d
        Constant MaintenanceRespirationFunction: FixedValue=0; Units=0-1
        Constant DMConversionEfficiency: FixedValue=1; Units=0-1
        BiomassRemoval BiomassRemovalDefaults: same as Replacements.Pinus.Branch.BiomassRemovalDefaults
        Constant DMReallocationFactor: FixedValue=0; Units=0-1
        VariableReference CriticalNConc: VariableName=[Stem].MinimumNConc
        Constant RemobilisationCost: FixedValue=0
        Constant CarbonConcentration: FixedValue=0.5; Units=g/g
        BiomassDemandAndPriority DMDemands
          MultiplyFunction Structural
            PartitionFractionDemandFunction DMDemandFunction
              LinearInterpolationFunction PartitionFraction
                XYPairs: X=[0, 1000, 10000, 20000]; Y=[0.11, 0.13, 0.17, 0.19]
                VariableReference XValue: VariableName=[Pinus].IndividualTreeLiveWt
            Constant StructuralFraction: FixedValue=0.99; Units=0-1
          Constant Metabolic: FixedValue=0
          StorageDMDemandFunction Storage
            SubtractFunction StorageFraction
              Constant One: FixedValue=1
              VariableReference StructuralFraction: VariableName=[CoarseRoot].DMDemands.Structural.StructuralFraction
          Constant QStructuralPriority: FixedValue=1
          Constant QMetabolicPriority: FixedValue=1
          Constant QStoragePriority: FixedValue=1
        BiomassDemandAndPriority NDemands
          MultiplyFunction Structural
            VariableReference MinNconc: VariableName=[CoarseRoot].minimumNconc
            VariableReference PotentialDMAllocation: VariableName=[CoarseRoot].potentialDMAllocation.Structural
          MultiplyFunction Metabolic
            SubtractFunction MetabolicNconc
              VariableReference CritNconc: VariableName=[CoarseRoot].criticalNConc
              VariableReference MinNconc: VariableName=[CoarseRoot].minimumNconc
            VariableReference PotentialDMAllocation: VariableName=[CoarseRoot].potentialDMAllocation.Structural
          StorageNDemandFunction Storage
            VariableReference NitrogenDemandSwitch: VariableName=[CoarseRoot].nitrogenDemandSwitch
            VariableReference MaxNconc: VariableName=[CoarseRoot].maximumNconc
          Constant QStructuralPriority: FixedValue=1
          Constant QMetabolicPriority: FixedValue=1
          Constant QStoragePriority: FixedValue=1
        RetranslocateNonStructural RetranslocateNitrogen
        BiomassDemand InitialWt
          Constant Structural: FixedValue=0; Units=g
          Constant Metabolic: FixedValue=0
          Constant Storage: FixedValue=0
        Constant Photosynthesis: FixedValue=0
        VariableReference initialNConcFunction: VariableName=[CoarseRoot].MinimumNConc
      Root FineRoot: GrowthRespiration=0; MaintenanceRespiration=0
        RootShapeCylinder RootShape
        PhaseLookupValue NitrogenDemandSwitch: Start=Emergence; End=Old
          Constant: FixedValue=1
        Constant RootFrontVelocity: FixedValue=10; Units=mm/d
          Memo
            [huth_managing_2008] measured a constant root front velocity of 24.3 mm/d down to 1.4 m depth under favourable growing conditions, which was similar to wheat. [goncalves2013integrating] report eucalypt root front velocities averaging 19 mm/day for the first 1.5 years to 12 mm/day by 3.5 years in conditions of little impedence to root growth. The value of 10 mm/d used here is lower to reflect more common limiting conditions.
        Constant SenescenceRate: FixedValue=0.001; Units=/d
        Constant MaxDailyNUptake: FixedValue=6; Units=kg/ha/d
        Constant MaximumNConc: FixedValue=0.01; Units=g/g
          Memo
            Fine root N concentrations are based on Misra et al (1998).
        Constant MinimumNConc: FixedValue=0.003; Units=g/g
        Constant MaximumRootDepth: FixedValue=10000; Units=mm
        Constant KLModifier: FixedValue=1
        Constant KNO3: FixedValue=0.03
        Constant KNH4: FixedValue=3e-06
        LinearInterpolationFunction NUptakeSWFactor
          XYPairs: X=[0, 1]; Y=[0, 1]
          VariableReference XValue: VariableName=[Root].RWC
        Constant SpecificRootLength: FixedValue=40; Units=m/g
          Memo
            Specific root length was based on [jourdan2008fine].
        BiomassRemoval BiomassRemovalDefaults: same as Replacements.Pinus.Branch.BiomassRemovalDefaults
        Constant DMConversionEfficiency: FixedValue=1; Units=0-1
        Constant MaintenanceRespirationFunction: FixedValue=0; Units=0-1
        Constant RemobilisationCost: FixedValue=0
        Constant CarbonConcentration: FixedValue=0.5; Units=g/g
        BiomassDemandAndPriority DMDemands
          MultiplyFunction Structural
            PartitionFractionDemandFunction DMDemandFunction
              Constant PartitionFraction: FixedValue=0.11
            Constant StructuralFraction: FixedValue=1
          Constant Metabolic: FixedValue=0
          StorageDMDemandFunction Storage
            SubtractFunction StorageFraction
              Constant One: FixedValue=1
              VariableReference StructuralFraction: VariableName=[FineRoot].DMDemands.Structural.StructuralFraction
          Constant QStructuralPriority: FixedValue=1
          Constant QMetabolicPriority: FixedValue=1
          Constant QStoragePriority: FixedValue=1
        BiomassDemandAndPriority NDemands
          MultiplyFunction Structural
            VariableReference MinNconc: VariableName=[FineRoot].minimumNconc
            VariableReference PotentialDMAllocation: VariableName=[FineRoot].potentialDMAllocation.Structural
          MultiplyFunction Metabolic
            SubtractFunction MetabolicNconc
              VariableReference CritNconc: VariableName=[FineRoot].criticalNConc
              VariableReference MinNconc: VariableName=[FineRoot].minimumNconc
            VariableReference PotentialDMAllocation: VariableName=[FineRoot].potentialDMAllocation.Structural
          StorageNDemandFunction Storage
            VariableReference NitrogenDemandSwitch: VariableName=[FineRoot].nitrogenDemandSwitch
            VariableReference MaxNconc: VariableName=[FineRoot].maximumNconc
          Constant QStructuralPriority: FixedValue=1
          Constant QMetabolicPriority: FixedValue=1
          Constant QStoragePriority: FixedValue=1
        VariableReference CriticalNConc: VariableName=[Root].MinimumNConc
        BiomassDemand InitialWt
          Constant Structural: FixedValue=0.2; Units=g/plant
          Constant Metabolic: FixedValue=0
          Constant Storage: FixedValue=0
        Constant RootDepthStressFactor: FixedValue=1
      DivideFunction RootShootRatio
        VariableReference Numerator: VariableName=[Pinus].BelowGround.Wt
        VariableReference Denominator: VariableName=[Pinus].AboveGround.Wt
      CultivarFolder caribaea
        Cultivar caribaea
          Command:
            [Leaf].Photosynthesis.RUE.FixedValue=1.3
            [Leaf].Photosynthesis.FT.FTDaytime.XYPairs.X=4, 20, 30, 38
            [Leaf].Photosynthesis.FT.FTDaytime.XYPairs.Y=0, 1, 1, 0
            [Cone].MaximumNConc.FixedValue = 0.0024
            [Cone].MinimumNConc.FixedValue = 0.0014
            [Leaf].MaximumNConc.FixedValue = 0.011
            [Leaf].MinimumNConc.FixedValue = 0.005
            [Branch].MaximumNConc.FixedValue = 0.0024
            [Branch].MinimumNConc.FixedValue = 0.0014
            [Stem].MaximumNConc.FixedValue = 0.00075
            [Stem].MinimumNConc.FixedValue = 0.00035
            [CoarseRoot].MaximumNConc.FixedValue = 0.00075
            [CoarseRoot].MinimumNConc.FixedValue = 0.00035
            [FineRoot].MaximumNConc.FixedValue = 0.011
            [FineRoot].MinimumNConc.FixedValue = 0.005
            [Cone].DMDemands.Structural.DMDemandFunction.PartitionFraction.XYPairs.X=0,  1000,	 10000,	25000,	50000,	100000,	200000,	400000,	800000
            [Cone].DMDemands.Structural.DMDemandFunction.PartitionFraction.XYPairs.Y=0.000, 0.000, 0.000, 0.025, 0.045, 0.044, 0.042, 0.04, 0.035
            [Leaf].DMDemands.Structural.DMDemandFunction.PartitionFraction.XYPairs.X=0,  1000,	 10000,	25000,	50000,	100000,	200000,	400000,	800000
            [Leaf].DMDemands.Structural.DMDemandFunction.PartitionFraction.XYPairs.Y= 0.31,	0.1,	0.10,	0.10,	0.1,	0.1,	0.1,	0.1,	0.1
            [Branch].DMDemands.Structural.DMDemandFunction.PartitionFraction.XYPairs.X=0,  1000,	 10000,	25000,	50000,	100000,	200000,	400000,	800000
            [Branch].DMDemands.Structural.DMDemandFunction.PartitionFraction.XYPairs.Y= 0.07, 0.08, 0.09, 0.065, 0.05, 0.05, 0.05, 0.04, 0.04
            [Stem].DMDemands.Structural.DMDemandFunction.PartitionFraction.XYPairs.X=0,	 1000,	 10000,	25000,	50000,	100000,	200000,	400000,	800000
            [Stem].DMDemands.Structural.DMDemandFunction.PartitionFraction.XYPairs.Y=0.15, 0.3, 0.4, 0.5, 0.6, 0.7, 0.8, 0.8, 0.8
            [Stem].WoodWt.WoodWt.WoodWtFactor.XYPairs.X=0, 2000, 10000, 20000, 100000, 200000, 400000
            [Stem].WoodWt.WoodWt.WoodWtFactor.XYPairs.Y=0.45, 0.55,  0.65, 0.67,   0.7,   0.73,   0.75
            [CoarseRoot].DMDemands.Structural.DMDemandFunction.PartitionFraction.XYPairs.X=0,  1000,	 10000,	25000,	50000,	100000,	200000,	400000,	800000
            [CoarseRoot].DMDemands.Structural.DMDemandFunction.PartitionFraction.XYPairs.Y=0.008, 0.020, 0.060, 0.08, 0.100, 0.120, 0.140, 0.16, 0.18
            [FineRoot].DMDemands.Structural.StructuralFraction.FixedValue=0.15
            [Leaf].SpecificLeafAreaFunction.SLAPotential.Expression=0.006-[Pinus].Leaf.Wt*0.00000025
            [Leaf].LeafResidenceTime.XYPairs.X=0,1,2,3,6,9
            [Leaf].LeafResidenceTime.XYPairs.Y=550, 580, 630, 700, 850, 850
            [Stem].DBH.DBHEquation.Expression=-3.24+(0.82*[Pinus].IndividualTreeStemWt^0.29)
            [Stem].Ht.HeightFunction.Expression=0.304375+(0.245023*[Pinus].Stem.DBH^1.2668)+(0.211611*([Pinus].Population*10000)^0.218209)
            [Stem].Vol.VolumeEquation.Expression=[Pinus].Stem.Ht*[Pinus].Stem.BA*(0.942*(([Pinus].Stem.Ht-1.4)^-1.161)+0.317)
            [Stem].BarkThickness.BarkThickness.XYPairs.X=0, 8,  12,     16,     20, 24, 28, 40, 80
            [Stem].BarkThickness.BarkThickness.XYPairs.Y=0,	.6,	0.8,	1,	1.3,	1.6,	1.9,	2.05,	2.1
          Memo
            This cultivar was initially developed for the IMPAC site.
      CultivarFolder elliottii
        Cultivar elliottii
          Command:
            [Leaf].Photosynthesis.RUE.FixedValue=1.3
            [Leaf].Photosynthesis.FT.FTDaytime.XYPairs.X=4, 20, 30, 38
            [Leaf].Photosynthesis.FT.FTDaytime.XYPairs.Y=0, 1, 1, 0
            [Cone].MaximumNConc.FixedValue = 0.0024
            [Cone].MinimumNConc.FixedValue = 0.0014
            [Leaf].MaximumNConc.FixedValue = 0.011
            [Leaf].MinimumNConc.FixedValue = 0.005
            [Branch].MaximumNConc.FixedValue = 0.0024
            [Branch].MinimumNConc.FixedValue = 0.0014
            [Stem].MaximumNConc.FixedValue = 0.00075
            [Stem].MinimumNConc.FixedValue = 0.00035
            [CoarseRoot].MaximumNConc.FixedValue = 0.00075
            [CoarseRoot].MinimumNConc.FixedValue = 0.00035
            [FineRoot].MaximumNConc.FixedValue = 0.011
            [FineRoot].MinimumNConc.FixedValue = 0.005
            [Cone].DMDemands.Structural.DMDemandFunction.PartitionFraction.XYPairs.X=0,  1000,	 10000,	25000,	50000,	100000,	200000,	400000,	800000
            [Cone].DMDemands.Structural.DMDemandFunction.PartitionFraction.XYPairs.Y=0.000, 0.000, 0.000, 0.025, 0.045, 0.044, 0.042, 0.04, 0.035
            [Leaf].DMDemands.Structural.DMDemandFunction.PartitionFraction.XYPairs.X=0,  1000,	 10000,	25000,	50000,	100000,	200000,	400000,	800000
            [Leaf].DMDemands.Structural.DMDemandFunction.PartitionFraction.XYPairs.Y= 0.31,	0.1,	0.10,	0.10,	0.1,	0.1,	0.1,	0.1,	0.1
            [Branch].DMDemands.Structural.DMDemandFunction.PartitionFraction.XYPairs.X=0,  1000,	 10000,	25000,	50000,	100000,	200000,	400000,	800000
            [Branch].DMDemands.Structural.DMDemandFunction.PartitionFraction.XYPairs.Y= 0.07, 0.08, 0.09, 0.065, 0.05, 0.05, 0.05, 0.04, 0.04
            [Stem].DMDemands.Structural.DMDemandFunction.PartitionFraction.XYPairs.X=0,	 1000,	 10000,	25000,	50000,	100000,	200000,	400000,	800000
            [Stem].DMDemands.Structural.DMDemandFunction.PartitionFraction.XYPairs.Y=0.15, 0.3, 0.4, 0.5, 0.6, 0.7, 0.8, 0.8, 0.8
            [CoarseRoot].DMDemands.Structural.DMDemandFunction.PartitionFraction.XYPairs.X=0,  1000,	 10000,	25000,	50000,	100000,	200000,	400000,	800000
            [CoarseRoot].DMDemands.Structural.DMDemandFunction.PartitionFraction.XYPairs.Y=0.008, 0.020, 0.060, 0.08, 0.100, 0.120, 0.140, 0.16, 0.18
            [FineRoot].DMDemands.Structural.StructuralFraction.FixedValue=0.15
            [Leaf].SpecificLeafAreaFunction.SLAPotential.Expression=0.006-[Pinus].Leaf.Wt*0.00000025
            [Leaf].LeafResidenceTime.XYPairs.X=0,1,2,3,6,9
            [Leaf].LeafResidenceTime.XYPairs.Y=550, 580, 630, 700, 850, 850
            [Stem].DBH.DBHEquation.Expression=-3.24+(0.82*[Pinus].IndividualTreeStemWt^0.29)
            [Stem].Ht.HeightFunction.Expression=0.304375+(0.245023*[Pinus].Stem.DBH^1.2668)+(0.211611*([Pinus].Population*10000)^0.218209)
            [Stem].BarkThickness.BarkThickness.XYPairs.X=0, 8,  12,     16,     20, 24, 28, 40, 80
            [Stem].BarkThickness.BarkThickness.XYPairs.Y=0,	.6,	0.8,	1,	1.3,	1.4,	1.5,	1.6,	1.7
          Memo
            This cultivar was initially developed for the IMPAC site.
        Cultivar PEE
          Command:
            [Leaf].Photosynthesis.RUE.FixedValue=1.3
            [Leaf].Photosynthesis.FT.FTDaytime.XYPairs.X=4, 20, 30, 38
            [Leaf].Photosynthesis.FT.FTDaytime.XYPairs.Y=0, 1, 1, 0
            [Cone].MaximumNConc.FixedValue = 0.0024
            [Cone].MinimumNConc.FixedValue = 0.0014
            [Leaf].MaximumNConc.FixedValue = 0.011
            [Leaf].MinimumNConc.FixedValue = 0.005
            [Branch].MaximumNConc.FixedValue = 0.0024
            [Branch].MinimumNConc.FixedValue = 0.0014
            [Stem].MaximumNConc.FixedValue = 0.00075
            [Stem].MinimumNConc.FixedValue = 0.00035
            [CoarseRoot].MaximumNConc.FixedValue = 0.00075
            [CoarseRoot].MinimumNConc.FixedValue = 0.00035
            [FineRoot].MaximumNConc.FixedValue = 0.011
            [FineRoot].MinimumNConc.FixedValue = 0.005
            [Cone].DMDemands.Structural.DMDemandFunction.PartitionFraction.XYPairs.X=0,  1000,	 10000,	25000,	50000,	100000,	200000,	400000,	800000
            [Cone].DMDemands.Structural.DMDemandFunction.PartitionFraction.XYPairs.Y=0.000, 0.000, 0.000, 0.025, 0.045, 0.044, 0.042, 0.04, 0.035
            [Leaf].DMDemands.Structural.DMDemandFunction.PartitionFraction.XYPairs.X=0,  1000,	 10000,	25000,	50000,	100000,	200000,	400000,	800000
            [Leaf].DMDemands.Structural.DMDemandFunction.PartitionFraction.XYPairs.Y= 0.31,	0.1,	0.10,	0.10,	0.1,	0.1,	0.1,	0.1,	0.1
            [Branch].DMDemands.Structural.DMDemandFunction.PartitionFraction.XYPairs.X=0,  1000,	 10000,	25000,	50000,	100000,	200000,	400000,	800000
            [Branch].DMDemands.Structural.DMDemandFunction.PartitionFraction.XYPairs.Y= 0.07, 0.08, 0.09, 0.065, 0.05, 0.05, 0.05, 0.04, 0.04
            [Stem].DMDemands.Structural.DMDemandFunction.PartitionFraction.XYPairs.X=0,	 1000,	 10000,	25000,	50000,	100000,	200000,	400000,	800000
            [Stem].DMDemands.Structural.DMDemandFunction.PartitionFraction.XYPairs.Y=0.15, 0.3, 0.4, 0.5, 0.6, 0.7, 0.8, 0.8, 0.8
            [Stem].WoodWt.WoodWt.WoodWtFactor.XYPairs.X=0, 2000, 10000, 20000, 100000, 200000, 400000
            [Stem].WoodWt.WoodWt.WoodWtFactor.XYPairs.Y=0.45, 0.55,  0.65, 0.67,   0.7,   0.73,   0.75
            [CoarseRoot].DMDemands.Structural.DMDemandFunction.PartitionFraction.XYPairs.X=0,  1000,	 10000,	25000,	50000,	100000,	200000,	400000,	800000
            [CoarseRoot].DMDemands.Structural.DMDemandFunction.PartitionFraction.XYPairs.Y=0.008, 0.020, 0.060, 0.08, 0.100, 0.120, 0.140, 0.16, 0.18
            [FineRoot].DMDemands.Structural.StructuralFraction.FixedValue=0.15
            [Leaf].SpecificLeafAreaFunction.SLAPotential.Expression=0.006-[Pinus].Leaf.Wt*0.00000025
            [Leaf].LeafResidenceTime.XYPairs.X=0,1,2,3,6,9
            [Leaf].LeafResidenceTime.XYPairs.Y=550, 580, 630, 700, 850, 850
            [Stem].DBH.DBHEquation.Expression=-3.24+(0.82*[Pinus].IndividualTreeStemWt^0.29)
            [Stem].Ht.HeightFunction.Expression=0.304375+(0.245023*[Pinus].Stem.DBH^1.2668)+(0.211611*([Pinus].Population*10000)^0.218209)
            [Stem].Vol.VolumeEquation.Expression=[Pinus].Stem.Ht*[Pinus].Stem.BA*(0.942*(([Pinus].Stem.Ht-1.4)^-1.161)+0.317)
            [Stem].BarkThickness.BarkThickness.XYPairs.X=0, 8,  12,     16,     20, 24, 28, 40, 80
            [Stem].BarkThickness.BarkThickness.XYPairs.Y=.1,	.3,	0.5,	6,	.7,	.8,	1,	1.1,	1.1
          Memo
            This cultivar was initially developed for the a south-east Queensland site.
        Cultivar elliottiiIMPAC
          Command:
            [Leaf].Photosynthesis.RUE.FixedValue=1.4
            [Leaf].Photosynthesis.FT.FTDaytime.XYPairs.X=4, 24, 33, 38
            [Leaf].Photosynthesis.FT.FTDaytime.XYPairs.Y=0, 1, 1, 0
            [Cone].MaximumNConc.FixedValue = 0.0024
            [Cone].MinimumNConc.FixedValue = 0.0014
            [Leaf].MaximumNConc.FixedValue = 0.017
            [Leaf].MinimumNConc.FixedValue = 0.007
            [Branch].MaximumNConc.FixedValue = 0.0024
            [Branch].MinimumNConc.FixedValue = 0.0014
            [Stem].MaximumNConc.FixedValue = 0.001
            [Stem].MinimumNConc.FixedValue = 0.0005
            [CoarseRoot].MaximumNConc.FixedValue = 0.001
            [CoarseRoot].MinimumNConc.FixedValue = 0.0005
            [FineRoot].MaximumNConc.FixedValue = 0.017
            [FineRoot].MinimumNConc.FixedValue = 0.007
            [Cone].DMDemands.Structural.DMDemandFunction.PartitionFraction.XYPairs.X=0, 1000, 10000, 20000, 50000
            [Cone].DMDemands.Structural.DMDemandFunction.PartitionFraction.XYPairs.Y=0,  0,    0,     0.045,  0.065
            [Branch].DMDemands.Structural.DMDemandFunction.PartitionFraction.XYPairs.X=0, 1000, 10000, 20000, 50000, 100000, 200000
            [Branch].DMDemands.Structural.DMDemandFunction.PartitionFraction.XYPairs.Y=0.2, 0.3, 0.4, 0.3, 0.18, .1, .0
            [Leaf].DMDemands.Structural.DMDemandFunction.PartitionFraction.XYPairs.X=0, 1000, 10000, 20000, 40000, 80000, 160000, 200000
            [Leaf].DMDemands.Structural.DMDemandFunction.PartitionFraction.XYPairs.Y=0.4, 0.4, 0.4, 0.39,  0.35, 0.2, 0.16, .15
            [Stem].DMDemands.Structural.DMDemandFunction.PartitionFraction.XYPairs.X=0, 1000, 10000, 50000, 100000, 200000, 300000
            [Stem].DMDemands.Structural.DMDemandFunction.PartitionFraction.XYPairs.Y=0.5, 0.9, 0.9,   0.9,  0.9,    0.1,  0.0
            [Stem].WoodWt.WoodWt.WoodWtFactor.XYPairs.X=0, 2000, 10000, 20000, 100000, 200000, 400000
            [Stem].WoodWt.WoodWt.WoodWtFactor.XYPairs.Y=0.7, 0.9,  0.95, 0.95,   0.985,   0.995,   0.99
            [CoarseRoot].DMDemands.Structural.DMDemandFunction.PartitionFraction.XYPairs.X=0, 1000, 10000, 20000, 50000, 100000, 200000, 500000
            [CoarseRoot].DMDemands.Structural.DMDemandFunction.PartitionFraction.XYPairs.Y=0.15, 0.15, 0.15, 0.16, 0.16, 0.16, 0.15,  0.15
            [FineRoot].DMDemands.Structural.StructuralFraction.FixedValue=0.12
            [FineRoot].SenescenceRate.FixedValue=0.001
            [Leaf].SpecificLeafAreaFunction.SLAPotential.Expression=0.0063-[Pinus].Leaf.Wt*0.000004
            [Stem].DBH.DBHEquation.Expression=-1.8+(0.815*[Pinus].IndividualTreeStemWt^0.29)
            [Stem].Ht.HeightFunction.Expression=0.304375+(0.9*[Pinus].Stem.DBH^0.9)+(0*([Pinus].Population*10000)^0.218209)
          Memo
            This cultivar was initially developed for the IMPAC site.
        Cultivar elliottiiQLD
          Command:
            [Leaf].Photosynthesis.RUE.FixedValue=1.3
            [Leaf].Photosynthesis.FT.FTDaytime.XYPairs.X=4, 20, 30, 38
            [Leaf].Photosynthesis.FT.FTDaytime.XYPairs.Y=0, 1, 1, 0
            [Cone].MaximumNConc.FixedValue = 0.0024
            [Cone].MinimumNConc.FixedValue = 0.0014
            [Leaf].MaximumNConc.FixedValue = 0.011
            [Leaf].MinimumNConc.FixedValue = 0.005
            [Branch].MaximumNConc.FixedValue = 0.0024
            [Branch].MinimumNConc.FixedValue = 0.0014
            [Stem].MaximumNConc.FixedValue = 0.00075
            [Stem].MinimumNConc.FixedValue = 0.00035
            [CoarseRoot].MaximumNConc.FixedValue = 0.00075
            [CoarseRoot].MinimumNConc.FixedValue = 0.00035
            [FineRoot].MaximumNConc.FixedValue = 0.011
            [FineRoot].MinimumNConc.FixedValue = 0.005
            [Cone].DMDemands.Structural.DMDemandFunction.PartitionFraction.XYPairs.X=0,  1000,	 10000,	25000,	50000,	100000,	200000,	400000,	800000
            [Cone].DMDemands.Structural.DMDemandFunction.PartitionFraction.XYPairs.Y=0.000, 0.000, 0.000, 0.025, 0.045, 0.044, 0.042, 0.04, 0.035
            [Leaf].DMDemands.Structural.DMDemandFunction.PartitionFraction.XYPairs.X=0,  1000,	 10000,	25000,	50000,	100000,	200000,	400000,	800000
            [Leaf].DMDemands.Structural.DMDemandFunction.PartitionFraction.XYPairs.Y= 0.31,	0.1,	0.10,	0.10,	0.1,	0.1,	0.1,	0.1,	0.1
            [Branch].DMDemands.Structural.DMDemandFunction.PartitionFraction.XYPairs.X=0,  1000,	 10000,	25000,	50000,	100000,	200000,	400000,	800000
            [Branch].DMDemands.Structural.DMDemandFunction.PartitionFraction.XYPairs.Y= 0.07, 0.08, 0.09, 0.065, 0.05, 0.05, 0.05, 0.04, 0.04
            [Stem].DMDemands.Structural.DMDemandFunction.PartitionFraction.XYPairs.X=0,	 1000,	 10000,	25000,	50000,	100000,	200000,	400000,	800000
            [Stem].DMDemands.Structural.DMDemandFunction.PartitionFraction.XYPairs.Y=0.15, 0.3, 0.4, 0.5, 0.6, 0.7, 0.8, 0.8, 0.8
            [Stem].WoodWt.WoodWt.WoodWtFactor.XYPairs.X=0, 2000, 10000, 20000, 100000, 200000, 400000
            [Stem].WoodWt.WoodWt.WoodWtFactor.XYPairs.Y=0.45, 0.55,  0.65, 0.67,   0.7,   0.73,   0.75
            [CoarseRoot].DMDemands.Structural.DMDemandFunction.PartitionFraction.XYPairs.X=0,  1000,	 10000,	25000,	50000,	100000,	200000,	400000,	800000
            [CoarseRoot].DMDemands.Structural.DMDemandFunction.PartitionFraction.XYPairs.Y=0.008, 0.020, 0.060, 0.08, 0.100, 0.120, 0.140, 0.16, 0.18
            [FineRoot].DMDemands.Structural.StructuralFraction.FixedValue=0.15
            [Leaf].SpecificLeafAreaFunction.SLAPotential.Expression=0.006-[Pinus].Leaf.Wt*0.00000025
            [Leaf].LeafResidenceTime.XYPairs.X=0,1,2,3,6,9
            [Leaf].LeafResidenceTime.XYPairs.Y=550, 580, 630, 700, 850, 850
            [Stem].DBH.DBHEquation.Expression=-3.24+(0.82*[Pinus].IndividualTreeStemWt^0.29)
            [Stem].Ht.HeightFunction.Expression=0.304375+(0.245023*[Pinus].Stem.DBH^1.2668)+(0.211611*([Pinus].Population*10000)^0.218209)
            [Stem].Vol.VolumeEquation.Expression=[Pinus].Stem.Ht*[Pinus].Stem.BA*(0.942*(([Pinus].Stem.Ht-1.4)^-1.161)+0.317)
            [Stem].BarkThickness.BarkThickness.XYPairs.X=0, 8,  12,     16,     20, 24, 28, 40, 80
            [Stem].BarkThickness.BarkThickness.XYPairs.Y=.1,	.3,	0.5,	.6,	.7,	1.1,	1.46,	1.5,	1.5
          Memo
            This cultivar was initially developed for the a south-east Queensland site.
      CultivarFolder elliottiiXcaribaeaF1
        Cultivar elliottiiXcaribaeaF1
          Command:
            [Leaf].Photosynthesis.RUE.FixedValue=1.3
            [Leaf].Photosynthesis.FT.FTDaytime.XYPairs.X=4, 20, 30, 38
            [Leaf].Photosynthesis.FT.FTDaytime.XYPairs.Y=0, 1, 1, 0
            [Cone].MaximumNConc.FixedValue = 0.0024
            [Cone].MinimumNConc.FixedValue = 0.0014
            [Leaf].MaximumNConc.FixedValue = 0.011
            [Leaf].MinimumNConc.FixedValue = 0.005
            [Branch].MaximumNConc.FixedValue = 0.0024
            [Branch].MinimumNConc.FixedValue = 0.0014
            [Stem].MaximumNConc.FixedValue = 0.00075
            [Stem].MinimumNConc.FixedValue = 0.00035
            [CoarseRoot].MaximumNConc.FixedValue = 0.00075
            [CoarseRoot].MinimumNConc.FixedValue = 0.00035
            [FineRoot].MaximumNConc.FixedValue = 0.011
            [FineRoot].MinimumNConc.FixedValue = 0.005
            [Cone].DMDemands.Structural.DMDemandFunction.PartitionFraction.XYPairs.X=0,  1000,	 10000,	25000,	50000,	100000,	200000,	400000,	800000
            [Cone].DMDemands.Structural.DMDemandFunction.PartitionFraction.XYPairs.Y=0.000, 0.000, 0.000, 0.025, 0.045, 0.044, 0.042, 0.04, 0.035
            [Leaf].DMDemands.Structural.DMDemandFunction.PartitionFraction.XYPairs.X=0,  1000,	 10000,	25000,	50000,	100000,	200000,	400000,	800000
            [Leaf].DMDemands.Structural.DMDemandFunction.PartitionFraction.XYPairs.Y= 0.31,	0.1,	0.10,	0.10,	0.1,	0.1,	0.1,	0.1,	0.1
            [Branch].DMDemands.Structural.DMDemandFunction.PartitionFraction.XYPairs.X=0,  1000,	 10000,	25000,	50000,	100000,	200000,	400000,	800000
            [Branch].DMDemands.Structural.DMDemandFunction.PartitionFraction.XYPairs.Y= 0.07, 0.08, 0.09, 0.065, 0.05, 0.05, 0.05, 0.04, 0.04
            [Stem].DMDemands.Structural.DMDemandFunction.PartitionFraction.XYPairs.X=0,	 1000,	 10000,	25000,	50000,	100000,	200000,	400000,	800000
            [Stem].DMDemands.Structural.DMDemandFunction.PartitionFraction.XYPairs.Y=0.15, 0.3, 0.4, 0.5, 0.6, 0.7, 0.8, 0.8, 0.8
            [Stem].WoodWt.WoodWt.WoodWtFactor.XYPairs.X=0, 2000, 10000, 20000, 100000, 200000, 400000
            [Stem].WoodWt.WoodWt.WoodWtFactor.XYPairs.Y=0.45, 0.55,  0.65, 0.67,   0.7,   0.73,   0.75
            [CoarseRoot].DMDemands.Structural.DMDemandFunction.PartitionFraction.XYPairs.X=0,  1000,	 10000,	25000,	50000,	100000,	200000,	400000,	800000
            [CoarseRoot].DMDemands.Structural.DMDemandFunction.PartitionFraction.XYPairs.Y=0.008, 0.020, 0.060, 0.08, 0.100, 0.120, 0.140, 0.16, 0.18
            [FineRoot].DMDemands.Structural.StructuralFraction.FixedValue=0.15
            [Leaf].SpecificLeafAreaFunction.SLAPotential.Expression=0.006-[Pinus].Leaf.Wt*0.00000025
            [Leaf].LeafResidenceTime.XYPairs.X=0,1,2,3,6,9
            [Leaf].LeafResidenceTime.XYPairs.Y=550, 580, 630, 700, 850, 850
            [Stem].DBH.DBHEquation.Expression=-3.24+(0.82*[Pinus].IndividualTreeStemWt^0.29)
            [Stem].Ht.HeightFunction.Expression=0.304375+(0.245023*[Pinus].Stem.DBH^1.2668)+(0.211611*([Pinus].Population*10000)^0.218209)
            [Stem].Vol.VolumeEquation.Expression=[Pinus].Stem.Ht*[Pinus].Stem.BA*(0.942*(([Pinus].Stem.Ht-1.4)^-1.161)+0.317)
            [Stem].BarkThickness.BarkThickness.XYPairs.X=0, 8,  12,     16,     20, 24, 28, 40, 80
            [Stem].BarkThickness.BarkThickness.XYPairs.Y=0,	.6,	0.8,	1,	1.3,	1.4,	1.6,	1.9,	1.9
          Memo
            This cultivar was initially developed for the a south-east Queensland site.
      CultivarFolder elliottiiXcaribaeaF2
        Cultivar elliottiiXcaribaeaF2
          Command:
            [Leaf].Photosynthesis.RUE.FixedValue=1.3
            [Leaf].Photosynthesis.FT.FTDaytime.XYPairs.X=4, 20, 30, 38
            [Leaf].Photosynthesis.FT.FTDaytime.XYPairs.Y=0, 1, 1, 0
            [Cone].MaximumNConc.FixedValue = 0.0024
            [Cone].MinimumNConc.FixedValue = 0.0014
            [Leaf].MaximumNConc.FixedValue = 0.011
            [Leaf].MinimumNConc.FixedValue = 0.005
            [Branch].MaximumNConc.FixedValue = 0.0024
            [Branch].MinimumNConc.FixedValue = 0.0014
            [Stem].MaximumNConc.FixedValue = 0.00075
            [Stem].MinimumNConc.FixedValue = 0.00035
            [CoarseRoot].MaximumNConc.FixedValue = 0.00075
            [CoarseRoot].MinimumNConc.FixedValue = 0.00035
            [FineRoot].MaximumNConc.FixedValue = 0.011
            [FineRoot].MinimumNConc.FixedValue = 0.005
            [Cone].DMDemands.Structural.DMDemandFunction.PartitionFraction.XYPairs.X=0,  1000,	 10000,	25000,	50000,	100000,	200000,	400000,	800000
            [Cone].DMDemands.Structural.DMDemandFunction.PartitionFraction.XYPairs.Y=0.000, 0.000, 0.000, 0.025, 0.045, 0.044, 0.042, 0.04, 0.035
            [Leaf].DMDemands.Structural.DMDemandFunction.PartitionFraction.XYPairs.X=0,  1000,	 10000,	25000,	50000,	100000,	200000,	400000,	800000
            [Leaf].DMDemands.Structural.DMDemandFunction.PartitionFraction.XYPairs.Y= 0.31,	0.1,	0.10,	0.10,	0.1,	0.1,	0.1,	0.1,	0.1
            [Branch].DMDemands.Structural.DMDemandFunction.PartitionFraction.XYPairs.X=0,  1000,	 10000,	25000,	50000,	100000,	200000,	400000,	800000
            [Branch].DMDemands.Structural.DMDemandFunction.PartitionFraction.XYPairs.Y= 0.07, 0.08, 0.09, 0.065, 0.05, 0.05, 0.05, 0.04, 0.04
            [Stem].DMDemands.Structural.DMDemandFunction.PartitionFraction.XYPairs.X=0,	 1000,	 10000,	25000,	50000,	100000,	200000,	400000,	800000
            [Stem].DMDemands.Structural.DMDemandFunction.PartitionFraction.XYPairs.Y=0.15, 0.3, 0.4, 0.5, 0.6, 0.7, 0.8, 0.8, 0.8
            [Stem].WoodWt.WoodWt.WoodWtFactor.XYPairs.X=0, 2000, 10000, 20000, 100000, 200000, 400000
            [Stem].WoodWt.WoodWt.WoodWtFactor.XYPairs.Y=0.45, 0.55,  0.65, 0.67,   0.7,   0.73,   0.75
            [CoarseRoot].DMDemands.Structural.DMDemandFunction.PartitionFraction.XYPairs.X=0,  1000,	 10000,	25000,	50000,	100000,	200000,	400000,	800000
            [CoarseRoot].DMDemands.Structural.DMDemandFunction.PartitionFraction.XYPairs.Y=0.008, 0.020, 0.060, 0.08, 0.100, 0.120, 0.140, 0.16, 0.18
            [FineRoot].DMDemands.Structural.StructuralFraction.FixedValue=0.15
            [Leaf].SpecificLeafAreaFunction.SLAPotential.Expression=0.006-[Pinus].Leaf.Wt*0.00000025
            [Leaf].LeafResidenceTime.XYPairs.X=0,1,2,3,6,9
            [Leaf].LeafResidenceTime.XYPairs.Y=550, 580, 630, 700, 850, 850
            [Stem].DBH.DBHEquation.Expression=-3.24+(0.82*[Pinus].IndividualTreeStemWt^0.29)
            [Stem].Ht.HeightFunction.Expression=0.304375+(0.245023*[Pinus].Stem.DBH^1.2668)+(0.211611*([Pinus].Population*10000)^0.218209)
            [Stem].Vol.VolumeEquation.Expression=[Pinus].Stem.Ht*[Pinus].Stem.BA*(0.942*(([Pinus].Stem.Ht-1.4)^-1.161)+0.317)
            [Stem].BarkThickness.BarkThickness.XYPairs.X=0, 8,  12,     16,     20, 24, 28, 40, 80
            [Stem].BarkThickness.BarkThickness.XYPairs.Y=0,	.6,	0.8,	1,	1.3,	1.4,	1.6,	1.8,	1.8
          Memo
            This cultivar was initially developed for the a south-east Queensland site.
      CultivarFolder radiata
        Cultivar BFG
          Command:
            [Leaf].Photosynthesis.RUE.FixedValue=0.95
            [Leaf].Photosynthesis.FN.XYPairs.X=0,1,1.5
            [Leaf].Photosynthesis.FN.XYPairs.Y=0,1,1
            [Leaf].Photosynthesis.FW.XYPairs.X=0,1,1.5
            [Leaf].Photosynthesis.FW.XYPairs.Y=0.8,1,1
            [Cone].MaximumNConc.FixedValue = 0.0024
            [Cone].MinimumNConc.FixedValue = 0.0014
            [Leaf].MaximumNConc.FixedValue = 0.011
            [Leaf].MinimumNConc.FixedValue = 0.005
            [Branch].MaximumNConc.FixedValue = 0.0024
            [Branch].MinimumNConc.FixedValue = 0.0014
            [Stem].MaximumNConc.FixedValue = 0.00075
            [Stem].MinimumNConc.FixedValue = 0.00035
            [CoarseRoot].MaximumNConc.FixedValue = 0.00075
            [CoarseRoot].MinimumNConc.FixedValue = 0.00035
            [FineRoot].MaximumNConc.FixedValue = 0.011
            [FineRoot].MinimumNConc.FixedValue = 0.005
            [Cone].DMDemands.Structural.DMDemandFunction.PartitionFraction.XYPairs.X=0, 1000, 10000, 20000, 50000
            [Cone].DMDemands.Structural.DMDemandFunction.PartitionFraction.XYPairs.Y=0,  0,    0,     0.045,  0.065
            [Branch].DMDemands.Structural.DMDemandFunction.PartitionFraction.XYPairs.X=0, 1000, 10000, 20000, 50000
            [Branch].DMDemands.Structural.DMDemandFunction.PartitionFraction.XYPairs.Y=0.1, 0.13, 0.16, 0.2, 0.22
            [Leaf].DMDemands.Structural.DMDemandFunction.PartitionFraction.XYPairs.X=0, 1000, 10000, 20000, 40000, 80000, 160000, 200000
            [Leaf].DMDemands.Structural.DMDemandFunction.PartitionFraction.XYPairs.Y=0.13, 0.13, 0.13, 0.13,  0.14, 0.22, 0.3, .15
            [Stem].DMDemands.Structural.DMDemandFunction.PartitionFraction.XYPairs.X=0, 1000, 10000, 50000, 100000, 200000, 300000
            [Stem].DMDemands.Structural.DMDemandFunction.PartitionFraction.XYPairs.Y=0.1, 0.2, 0.3,   0.6,  0.8,    0.85,  0.99
            [Stem].WoodWt.WoodWt.WoodWtFactor.XYPairs.X=0, 2000, 10000, 20000, 100000, 200000, 400000
            [Stem].WoodWt.WoodWt.WoodWtFactor.XYPairs.Y=0.6, 0.85,  0.9, 0.93,   0.975,   0.985,   0.99
            [CoarseRoot].DMDemands.Structural.DMDemandFunction.PartitionFraction.XYPairs.X=0, 1000, 10000, 20000, 50000, 100000, 200000, 500000
            [CoarseRoot].DMDemands.Structural.DMDemandFunction.PartitionFraction.XYPairs.Y=0.3, 0.3, 0.28, 0.23, 0.19, 0.19, 0.14,  0.12
            [FineRoot].DMDemands.Structural.StructuralFraction.FixedValue=0.215
            [Leaf].SpecificLeafAreaFunction.SLAPotential.Expression=0.0067-[Pinus].Leaf.Wt*0.0000002
            [Stem].DBH.DBHEquation.Expression=-1.5+(0.76*[Pinus].IndividualTreeStemWt^0.3)
          Memo
            This cultivar was initially developed for the BFG site.
        Cultivar GF7
          Command:
            [Leaf].Photosynthesis.RUE.FixedValue=1.3
            [Leaf].Photosynthesis.FN.XYPairs.X=0,1,1.5
            [Leaf].Photosynthesis.FN.XYPairs.Y=0,1,1
            [Leaf].Photosynthesis.FW.XYPairs.X=0,1,1.5
            [Leaf].Photosynthesis.FW.XYPairs.Y=0,1,1
            [Cone].MaximumNConc.FixedValue = 0.001
            [Cone].MinimumNConc.FixedValue = 0.006
            [Leaf].MaximumNConc.FixedValue = 0.017
            [Leaf].MinimumNConc.FixedValue = 0.007
            [Branch].MaximumNConc.FixedValue = 0.0065
            [Branch].MinimumNConc.FixedValue = 0.002
            [Stem].MaximumNConc.FixedValue = 0.002
            [Stem].MinimumNConc.FixedValue = 0.0003
            [CoarseRoot].MaximumNConc.FixedValue = 0.002
            [CoarseRoot].MinimumNConc.FixedValue = 0.0003
            [FineRoot].MaximumNConc.FixedValue = 0.017
            [FineRoot].MinimumNConc.FixedValue = 0.007
            [Leaf].DMDemands.Structural.DMDemandFunction.PartitionFraction.XYPairs.X=0, 1000, 10000, 20000, 40000, 80000, 160000, 200000
            [Leaf].DMDemands.Structural.DMDemandFunction.PartitionFraction.XYPairs.Y=0.2, 0.2, 0.2, 0.2,  0.2, 0.28, 0.3, .15
            [Branch].DMDemands.Structural.DMDemandFunction.PartitionFraction.XYPairs.X=0, 1000, 10000, 20000, 50000, 100000, 200000
            [Branch].DMDemands.Structural.DMDemandFunction.PartitionFraction.XYPairs.Y=0.12, 0.15, 0.2, 0.3, 0.4, .35, .3
            [Stem].DMDemands.Structural.DMDemandFunction.PartitionFraction.XYPairs.X=0, 1000, 10000, 50000, 100000, 200000, 300000
            [Stem].DMDemands.Structural.DMDemandFunction.PartitionFraction.XYPairs.Y=0.08, 0.12, 0.3,   0.8,  0.9,    0.95,  0.99
            [Stem].WoodWt.WoodWt.WoodWtFactor.XYPairs.X=0, 2000, 10000, 20000, 100000, 200000, 400000
            [Stem].WoodWt.WoodWt.WoodWtFactor.XYPairs.Y=0.9, 0.95,  0.99, 0.99,   0.99,   0.999,   0.9999
            [Cone].DMDemands.Structural.DMDemandFunction.PartitionFraction.XYPairs.X=0, 1000, 10000, 20000, 50000
            [Cone].DMDemands.Structural.DMDemandFunction.PartitionFraction.XYPairs.Y=0,  0,    0,     0,  0.01
            [Leaf].SpecificLeafAreaFunction.SLAPotential.Expression=0.0053+[Pinus].Leaf.Wt*0.0000001
            [Pinus].Stem.DBH.DBHEquation.Expression=-15+(3.748*[Pinus].IndividualTreeStemWt^0.21)
            [Pinus].Stem.Ht.HeightFunction.Expression=-6+(1.0*[Pinus].Stem.DBH^(1.001-(2200-[Pinus].Population*10000)*0.00004))
            [Stem].Vol.VolumeEquation.Expression=[Pinus].Stem.Ht*[Pinus].Stem.BA*(0.942*(([Pinus].Stem.Ht-1.4)^-1.161)+0.317)
            [Stem].BarkThickness.BarkThickness.XYPairs.X=0, 8,  12,     16,     20, 24, 28, 40, 80
            [Stem].BarkThickness.BarkThickness.XYPairs.Y=0.4,	.9,	0.93,	0.95,	0.97,	1.3,	1.4,	1.5,	1.5
            [Stem].Volub.Expression=[Pinus].Stem.Vol-[Pinus].Stem.VolBark*0.3
          Memo
            This cultivar was initially developed for the Puruki site.
        Cultivar TowerHill
          Command:
            [Leaf].Photosynthesis.RUE.FixedValue=0.85
            [Leaf].Photosynthesis.FN.XYPairs.X=0,1,1.5
            [Leaf].Photosynthesis.FN.XYPairs.Y=0,1,1
            [Leaf].Photosynthesis.FW.XYPairs.X=0,1,1.5
            [Leaf].Photosynthesis.FW.XYPairs.Y=0.7,1,1
            [Cone].MaximumNConc.FixedValue = 0.0024
            [Cone].MinimumNConc.FixedValue = 0.0014
            [Leaf].MaximumNConc.FixedValue = 0.011
            [Leaf].MinimumNConc.FixedValue = 0.005
            [Branch].MaximumNConc.FixedValue = 0.0024
            [Branch].MinimumNConc.FixedValue = 0.0014
            [Stem].MaximumNConc.FixedValue = 0.00075
            [Stem].MinimumNConc.FixedValue = 0.00035
            [CoarseRoot].MaximumNConc.FixedValue = 0.00075
            [CoarseRoot].MinimumNConc.FixedValue = 0.00035
            [FineRoot].MaximumNConc.FixedValue = 0.011
            [FineRoot].MinimumNConc.FixedValue = 0.005
            [Cone].DMDemands.Structural.DMDemandFunction.PartitionFraction.XYPairs.X=0, 1000, 10000, 20000, 50000
            [Cone].DMDemands.Structural.DMDemandFunction.PartitionFraction.XYPairs.Y=0,  0,    0,     0.03,  0.05
            [Branch].DMDemands.Structural.DMDemandFunction.PartitionFraction.XYPairs.X=0, 1000, 10000, 20000, 50000
            [Branch].DMDemands.Structural.DMDemandFunction.PartitionFraction.XYPairs.Y=0.04, 0.06, 0.08, 0.1, 0.1
            [Leaf].DMDemands.Structural.DMDemandFunction.PartitionFraction.XYPairs.X=0, 1000, 10000, 20000, 40000, 80000, 160000, 200000
            [Leaf].DMDemands.Structural.DMDemandFunction.PartitionFraction.XYPairs.Y=0.13, 0.13, 0.13, 0.13,  0.14, 0.22, 0.3, .15
            [Stem].DMDemands.Structural.DMDemandFunction.PartitionFraction.XYPairs.X=0, 1000, 10000, 50000, 100000, 200000, 300000
            [Stem].DMDemands.Structural.DMDemandFunction.PartitionFraction.XYPairs.Y=0.1, 0.2, 0.3,   0.6,  0.8,    0.85,  0.99
            [Stem].WoodWt.WoodWt.WoodWtFactor.XYPairs.X=0, 2000, 10000, 20000, 100000, 200000, 400000, 800000
            [Stem].WoodWt.WoodWt.WoodWtFactor.XYPairs.Y=0.5, 0.82,  0.84, 0.87,   0.86,   0.87,   0.88, 0.92
            [CoarseRoot].DMDemands.Structural.DMDemandFunction.PartitionFraction.XYPairs.X=0, 1000, 10000, 20000, 50000, 100000, 200000, 500000
            [CoarseRoot].DMDemands.Structural.DMDemandFunction.PartitionFraction.XYPairs.Y=0.3, 0.3, 0.29, 0.25, 0.24, 0.23, 0.2,  0.16
            [FineRoot].DMDemands.Structural.StructuralFraction.FixedValue=0.23
            [Leaf].SpecificLeafAreaFunction.SLAPotential.Expression=0.0067-[Pinus].Leaf.Wt*0.0000002
            [Stem].DBH.DBHEquation.Expression=-1.5+(0.76*[Pinus].IndividualTreeStemWt^0.298)
          Memo
            This cultivar was initially developed for the TowerHill site.
      CultivarFolder taeda
        Cultivar taeda
          Command:
            [Leaf].Photosynthesis.RUE.FixedValue=0.9
            [Leaf].Photosynthesis.FT.FTDaytime.XYPairs.X=4, 24, 33, 38
            [Leaf].Photosynthesis.FT.FTDaytime.XYPairs.Y=0, 1, 1, 0
            [Cone].MaximumNConc.FixedValue = 0.0024
            [Cone].MinimumNConc.FixedValue = 0.0014
            [Leaf].MaximumNConc.FixedValue = 0.015
            [Leaf].MinimumNConc.FixedValue = 0.007
            [Branch].MaximumNConc.FixedValue = 0.0024
            [Branch].MinimumNConc.FixedValue = 0.0014
            [Stem].MaximumNConc.FixedValue = 0.00075
            [Stem].MinimumNConc.FixedValue = 0.00035
            [CoarseRoot].MaximumNConc.FixedValue = 0.00075
            [CoarseRoot].MinimumNConc.FixedValue = 0.00035
            [FineRoot].MaximumNConc.FixedValue = 0.015
            [FineRoot].MinimumNConc.FixedValue = 0.007
            [Cone].DMDemands.Structural.DMDemandFunction.PartitionFraction.XYPairs.X=0, 1000, 10000, 20000, 50000
            [Cone].DMDemands.Structural.DMDemandFunction.PartitionFraction.XYPairs.Y=0,  0,    0,     0.045,  0.065
            [Branch].DMDemands.Structural.DMDemandFunction.PartitionFraction.XYPairs.X=0, 1000, 10000, 20000, 50000, 100000, 200000
            [Branch].DMDemands.Structural.DMDemandFunction.PartitionFraction.XYPairs.Y=0.1, 0.13, 0.16, 0.2, 0.22, .19, .16
            [Leaf].DMDemands.Structural.DMDemandFunction.PartitionFraction.XYPairs.X=0, 1000, 10000, 20000, 40000, 80000, 160000, 200000
            [Leaf].DMDemands.Structural.DMDemandFunction.PartitionFraction.XYPairs.Y=0.18, 0.16, 0.15, 0.14,  0.14, 0.14, 0.14, .14
            [Stem].DMDemands.Structural.DMDemandFunction.PartitionFraction.XYPairs.X=0, 1000, 10000, 50000, 100000, 200000, 300000
            [Stem].DMDemands.Structural.DMDemandFunction.PartitionFraction.XYPairs.Y=0.1, 0.2, 0.3,   0.6,  0.8,    0.85,  0.99
            [Stem].WoodWt.WoodWt.WoodWtFactor.XYPairs.X=0, 2000, 10000, 20000, 100000, 200000, 400000
            [Stem].WoodWt.WoodWt.WoodWtFactor.XYPairs.Y=0.6, 0.85,  0.9, 0.93,   0.975,   0.985,   0.99
            [CoarseRoot].DMDemands.Structural.DMDemandFunction.PartitionFraction.XYPairs.X=0, 1000, 10000, 20000, 50000, 100000, 200000, 500000
            [CoarseRoot].DMDemands.Structural.DMDemandFunction.PartitionFraction.XYPairs.Y=0.12, 0.13, 0.14, 0.15, 0.16, 0.17, 0.17,  0.17
            [FineRoot].DMDemands.Structural.StructuralFraction.FixedValue=0.13
            [FineRoot].SenescenceRate.FixedValue=0.003
            [Leaf].SpecificLeafAreaFunction.SLAPotential.Expression=0.006-[Pinus].Leaf.Wt*0.00000025
            [Stem].DBH.DBHEquation.Expression=-3.24+(0.82*[Pinus].IndividualTreeStemWt^0.3)
            [Stem].Ht.HeightFunction.Expression=0.304375+(0.245023*[Pinus].Stem.DBH^1.2668)+(0.211611*([Pinus].Population*10000)^0.218209)
          Memo
            This cultivar was initially developed for the SETRES sites.
        Cultivar taedaIMPAC
          Command:
            [Leaf].Photosynthesis.RUE.FixedValue=1.1
            [Leaf].Photosynthesis.FT.FTDaytime.XYPairs.X=4, 24, 33, 38
            [Leaf].Photosynthesis.FT.FTDaytime.XYPairs.Y=0, 1, 1, 0
            [Cone].MaximumNConc.FixedValue = 0.0024
            [Cone].MinimumNConc.FixedValue = 0.0014
            [Leaf].MaximumNConc.FixedValue = 0.017
            [Leaf].MinimumNConc.FixedValue = 0.007
            [Branch].MaximumNConc.FixedValue = 0.0024
            [Branch].MinimumNConc.FixedValue = 0.0014
            [Stem].MaximumNConc.FixedValue = 0.001
            [Stem].MinimumNConc.FixedValue = 0.0005
            [CoarseRoot].MaximumNConc.FixedValue = 0.001
            [CoarseRoot].MinimumNConc.FixedValue = 0.0005
            [FineRoot].MaximumNConc.FixedValue = 0.017
            [FineRoot].MinimumNConc.FixedValue = 0.007
            [Cone].DMDemands.Structural.DMDemandFunction.PartitionFraction.XYPairs.X=0, 1000, 10000, 20000, 50000
            [Cone].DMDemands.Structural.DMDemandFunction.PartitionFraction.XYPairs.Y=0,  0,    0,     0.045,  0.065
            [Branch].DMDemands.Structural.DMDemandFunction.PartitionFraction.XYPairs.X=0, 1000, 10000, 20000, 50000, 100000, 200000
            [Branch].DMDemands.Structural.DMDemandFunction.PartitionFraction.XYPairs.Y=0.3, 0.4, 0.3, 0.25, 0.18, .03, .0
            [Leaf].DMDemands.Structural.DMDemandFunction.PartitionFraction.XYPairs.X=0, 1000, 10000, 20000, 40000, 80000, 160000, 200000
            [Leaf].DMDemands.Structural.DMDemandFunction.PartitionFraction.XYPairs.Y=0.4, 0.39, 0.38, 0.37,  0.3, 0.17, 0.16, .15
            [Stem].DMDemands.Structural.DMDemandFunction.PartitionFraction.XYPairs.X=0, 1000, 10000, 50000, 100000, 200000, 300000
            [Stem].DMDemands.Structural.DMDemandFunction.PartitionFraction.XYPairs.Y=0.4, 0.9, 0.9,   0.8,  0.7,    0.1,  0.0
            [Stem].WoodWt.WoodWt.WoodWtFactor.XYPairs.X=0, 2000, 10000, 20000, 100000, 200000, 400000
            [Stem].WoodWt.WoodWt.WoodWtFactor.XYPairs.Y=0.6, 0.8,  0.9, 0.93,   0.975,   0.985,   0.99
            [CoarseRoot].DMDemands.Structural.DMDemandFunction.PartitionFraction.XYPairs.X=0, 1000, 10000, 20000, 50000, 100000, 200000, 500000
            [CoarseRoot].DMDemands.Structural.DMDemandFunction.PartitionFraction.XYPairs.Y=0.1, 0.15, 0.15, 0.15, 0.15, 0.15, 0.15,  0.15
            [FineRoot].DMDemands.Structural.StructuralFraction.FixedValue=0.15
            [FineRoot].SenescenceRate.FixedValue=0.002
            [Leaf].SpecificLeafAreaFunction.SLAPotential.Expression=0.0063-[Pinus].Leaf.Wt*0.0000025
            [Stem].DBH.DBHEquation.Expression=-1.3+(0.82*[Pinus].IndividualTreeStemWt^0.28)
            [Stem].Ht.HeightFunction.Expression=0.304375+(0.8*[Pinus].Stem.DBH^1.1)+(0*([Pinus].Population*10000)^0.218209)
          Memo
            This cultivar was initially developed for the IMPAC site.
  DataStore
  Folder Plantation_IxF_Experiment
    Experiment Treatment
      Factors
        Factor _: Specification=[Management]
          Operations C
            1973-12-31  [TreeThinning].Script.DoThin(0.05);
            1974-12-31  [TreeThinning].Script.DoThin(0.05);
            1975-12-31  [TreeThinning].Script.DoThin(0.05);
            1976-12-31  [TreeThinning].Script.DoThin(0.05);
            1977-12-31  [TreeThinning].Script.DoThin(0.05);
            1978-12-31  [TreeThinning].Script.DoThin(0.05);
            1979-12-31  [TreeThinning].Script.DoThin(0.05);
            1980-12-31  [TreeThinning].Script.DoThin(0.05);
            1981-12-31  [TreeThinning].Script.DoThin(0.05);
            1982-12-31  [TreeThinning].Script.DoThin(0.01);
            1983-06-15  [TreeThinning].Script.DoThin(0.00);
            1989-04-03  [TreeThinning].Script.DoThin(0.563);
            1973-06-15  [Fertiliser].Apply(Amount: 20, Type: Fertiliser.Types.NH4N, 0)
          Operations F
            1973-12-31  [TreeThinning].Script.DoThin(0.05);
            1974-12-31  [TreeThinning].Script.DoThin(0.05);
            1975-12-31  [TreeThinning].Script.DoThin(0.05);
            1976-12-31  [TreeThinning].Script.DoThin(0.05);
            1977-12-31  [TreeThinning].Script.DoThin(0.05);
            1978-12-31  [TreeThinning].Script.DoThin(0.05);
            1979-12-31  [TreeThinning].Script.DoThin(0.05);
            1980-12-31  [TreeThinning].Script.DoThin(0.05);
            1981-12-31  [TreeThinning].Script.DoThin(0.05);
            1982-12-31  [TreeThinning].Script.DoThin(0.05);
            1983-06-15  [TreeThinning].Script.DoThin(0.00);
            1985-06-15  [TreeThinning].Script.DoThin(0.068);
            1986-06-15  [TreeThinning].Script.DoThin(0.029);
            1987-08-27  [TreeThinning].Script.DoThin(0.015);
            1988-04-03  [TreeThinning].Script.DoThin(0.032);
            1989-04-03  [TreeThinning].Script.DoThin(0.46);
            1973-06-15  [Fertiliser].Apply(Amount: 20, Type: Fertiliser.Types.NH4N, 0)
            1983-09-28  [Fertiliser].Apply(Amount: 200, Type: Fertiliser.Types.NH4N, 0)
            1983-11-18  [Fertiliser].Apply(Amount: 200, Type: Fertiliser.Types.NH4N, 0)
          Operations I
            1973-12-31  [TreeThinning].Script.DoThin(0.05);
            1974-12-31  [TreeThinning].Script.DoThin(0.05);
            1975-12-31  [TreeThinning].Script.DoThin(0.05);
            1976-12-31  [TreeThinning].Script.DoThin(0.05);
            1977-12-31  [TreeThinning].Script.DoThin(0.05);
            1978-12-31  [TreeThinning].Script.DoThin(0.05);
            1979-12-31  [TreeThinning].Script.DoThin(0.05);
            1980-12-31  [TreeThinning].Script.DoThin(0.00);
            1981-12-31  [TreeThinning].Script.DoThin(0.00);
            1982-12-31  [TreeThinning].Script.DoThin(0.00);
            1983-06-15  [TreeThinning].Script.DoThin(0.00);
            1987-08-27  [TreeThinning].Script.DoThin(0.014);
            1988-04-03  [TreeThinning].Script.DoThin(0.014);
            1989-04-03  [TreeThinning].Script.DoThin(0.555);
            1973-06-15  [Fertiliser].Apply(Amount: 20, Type: Fertiliser.Types.NH4N, 0)
            1983-08-25  [AutomaticIrrigation].Script.TurnOn()
            2003-12-31  [AutomaticIrrigation].Script.TurnOff()
          Operations IF
            1973-12-31  [TreeThinning].Script.DoThin(0.05);
            1974-12-31  [TreeThinning].Script.DoThin(0.05);
            1975-12-31  [TreeThinning].Script.DoThin(0.05);
            1976-12-31  [TreeThinning].Script.DoThin(0.05);
            1977-12-31  [TreeThinning].Script.DoThin(0.05);
            1978-12-31  [TreeThinning].Script.DoThin(0.05);
            1979-12-31  [TreeThinning].Script.DoThin(0.01);
            1980-12-31  [TreeThinning].Script.DoThin(0.00);
            1981-12-31  [TreeThinning].Script.DoThin(0.00);
            1982-12-31  [TreeThinning].Script.DoThin(0.00);
            1989-04-03  [TreeThinning].Script.DoThin(0.462);
            1973-06-15  [Fertiliser].Apply(Amount: 20, Type: Fertiliser.Types.NH4N, 0)
            1983-06-28  [Fertiliser].Apply(Amount: 200, Type: Fertiliser.Types.NH4N, 0)
            1983-11-18  [Fertiliser].Apply(Amount: 200, Type: Fertiliser.Types.NH4N, 0)
            1983-08-25  [AutomaticIrrigation].Script.TurnOn()
            2003-12-31  [AutomaticIrrigation].Script.TurnOff()
          Operations CThinFromBelow
            1973-12-31  [TreeThinningFromAboveOrBelow].Script.DoThin(0.05);
            1974-12-31  [TreeThinningFromAboveOrBelow].Script.DoThin(0.05);
            1975-12-31  [TreeThinningFromAboveOrBelow].Script.DoThin(0.05);
            1976-12-31  [TreeThinningFromAboveOrBelow].Script.DoThin(0.05);
            1977-12-31  [TreeThinningFromAboveOrBelow].Script.DoThin(0.05);
            1978-12-31  [TreeThinningFromAboveOrBelow].Script.DoThin(0.05);
            1979-12-31  [TreeThinningFromAboveOrBelow].Script.DoThin(0.05);
            1980-12-31  [TreeThinningFromAboveOrBelow].Script.DoThin(0.05);
            1981-12-31  [TreeThinningFromAboveOrBelow].Script.DoThin(0.05);
            1982-12-31  [TreeThinningFromAboveOrBelow].Script.DoThin(0.01);
            1983-06-15  [TreeThinningFromAboveOrBelow].Script.DoThin(0.00);
            1989-04-03  [TreeThinningFromAboveOrBelow].Script.DoThin(0.563);
            1973-06-15  [Fertiliser].Apply(Amount: 20, Type: Fertiliser.Types.NH4N, 0)
      Simulation Base
        Clock: Start=1973-05-01; End=1995-12-31
        Weather: FileName=WeatherFiles\lincoln.met
        Manager ClimateController
          AllowControl = True
          EnableDate = 01/01/1972 00:00:00
          WithinYearControl = False
          ControlStart =
          ControlEnd =
          RainfallMultiplier = 2
          RainfallAddition = 0
          RadiationMultiplier = 1
          RadiationAddition = 0
          MinTMultiplier = 1
          MinTAddition = 0
          MaxTMultiplier = 1
          MaxTAddition = 0
          WindMultiplier = 1
          WindAddition = 0
          VPMultiplier = 1
          VPAddition = 0
```csharp
using Newtonsoft.Json;
using APSIM.Shared.Utilities;
using Models.Interfaces;
using Models.Soils;
using Models.PMF;
using Models.Core;
using System.Xml.Serialization;
using System;
using Models.Soils.Nutrients;
using Models.Climate;

namespace Models
{
    [Serializable]
    public class Script : Model
    {
        // - Links to APSIM models
        [Link] Zone zone;
        [Link] Clock clock;
        [Link] Weather weather;
        [Link] ISummary summary = null;

        // - Paramters for this manager
        [Description("Enable? Set to 'No' to completely disable this manager")] public bool AllowControl { get; set; }

        [Separator("General settings")]
        [Description("Start the climate controls beginning on date (dd/mmm/yyyy): ")] public DateTime EnableDate { get; set; }
        [Description("Implement climate control only during part of the year?")] public bool WithinYearControl { get; set; }
        [Description("Within each year, the first day to start the climate controls is (dd-mmm)")] public string ControlStart { get; set; }
        [Description("Within each year, end last day of climate control is (dd-mmm)")] public string ControlEnd { get; set; }

        [Separator("Rainfall")]
        [Description("Rainfall multiplier (-): ")] public double RainfallMultiplier { get; set; }
        [Description("Rainfall addition (mm): ")] public double RainfallAddition { get; set; }

        [Separator("Radiation")]
        [Description("Radiation multiplier (-): ")] public double RadiationMultiplier { get; set; }
        [Description("Radiation addition (MJ/m2): ")] public double RadiationAddition { get; set; }

        [Separator("Minimum temperature")]
        [Description("Minimum temperature multiplier (-): ")] public double MinTMultiplier { get; set; }
        [Description("Minimum temperature addition (C): ")] public double MinTAddition { get; set; }

        [Separator("Maximum temperature")]
        [Description("Maximum temperature multiplier (-): ")] public double MaxTMultiplier { get; set; }
        [Description("Maximum temperature addition (C): ")] public double MaxTAddition { get; set; }

        [Separator("Wind speed")]
        [Description("Wind speed multiplier (-): ")] public double WindMultiplier { get; set; }
        [Description("Wind speed addition (m/s): ")] public double WindAddition { get; set; }

        [Separator("Vapour pressure")]
        [Description("Vapour pressure multiplier (-): ")] public double VPMultiplier { get; set; }
        [Description("Vapour pressure addition (hPa): ")] public double VPAddition { get; set; }

        [JsonIgnore] public bool DoControl { get; set; }
        [JsonIgnore] public int DoControlInt { get; set; }

        [EventSubscribe("PreparingNewWeatherData")] private void OnDoManagement(object sender, EventArgs e)
        {
            // Check if this manager is enabled
            if ((AllowControl) && (clock.Today >= EnableDate))
            {
                DoControl = true;
                if (WithinYearControl)
                    DoControl = DateUtilities.WithinDates(ControlStart, clock.Today, ControlEnd); 
            }

            if (DoControl)
                DoControlInt = 1;
            else
                DoControlInt = 0;

            if (DoControl)
            {
                // do the weather alterations 
                weather.Rain = RainfallMultiplier * weather.Rain + RainfallAddition;
                weather.Radn = RadiationMultiplier * weather.Radn + RadiationAddition;
                weather.MinT = MinTMultiplier * weather.MinT + MinTAddition;
                weather.MaxT = MaxTMultiplier * weather.MaxT + MaxTAddition;
                weather.Wind = WindMultiplier * weather.Wind + WindAddition;
                weather.VP = VPMultiplier * weather.VP + VPAddition;
            }
        }
    }
}
```
        MicroClimate: a_interception=0; b_interception=0; c_interception=0.59; d_interception=0; SoilHeatFluxFraction=0.1; MinimumHeightDiffForNewLayer=0; NightInterceptionFraction=0; ReferenceHeight=2
        SoilArbitrator Soil Arbitrator
        Summary
        Zone Plantation: Area=1; Slope=5; AspectAngle=0; Altitude=50
          Soil SoilBFG: ASCOrder=NA; ASCSubOrder=NA; SoilType=Sand; Site=30395_43104; NearestTown=HALL; Region=South Eastern Highlands; State=ACT; NaturalVegetation=Cleared, non-native vegetation, buildings; ApsoilNumber=9999; Latitude=-35.33; Longitude=148.92; LocationAccuracy=+- 90m; YearOfSampling=2020; Comments=Landuse is Plantation forestry
            DataSource=Soil and Landscape Grid of Australia. This soil parameter file was automatically generated from the GSM National Surfaces using pedotransfer functions.
            Physical
              Thickness  BD     AirDry  LL15  DUL   SAT
              100        1.457  0.02    0.06  0.23  0.4
              200        1.6    0.02    0.06  0.23  0.35
              200        1.68   0.02    0.1   0.24  0.33
              300        1.75   0.05    0.18  0.25  0.31
              300        1.7    0.06    0.18  0.24  0.28
              300        1.7    0.06    0.18  0.23  0.23
              300        1.7    0.06    0.18  0.22  0.23
              300        1.7    0.06    0.18  0.22  0.23
              SoilCrop PinusSoil: LL=[0.06, 0.06, 0.06, 0.07, 0.08, 0.08, 0.08, 0.08]; KL=[0.07, 0.07, 0.05, 0.02, 0.01, 0.005, 0.005, 0.005]; XF=[1, 1, 1, 0.5, 0.3, 0.3, 0.3, 0.3]
            Sample Initial conditions: SWUnits=Volumetric; OCUnits=Total; PHUnits=Water
              Thickness  NO3  NH4  SW
              100        2    2    0.06
              100        1    1    0.06
              250        0.5  0.5  0.1
              150        0    0    0.18
              200        0    0    0.18
              200        0    0    0.18
              500        0    0    0.18
              500        0    0    0.18
            WaterBalance SoilWater: SummerDate=1-nov; SummerU=4; SummerCona=2; WinterDate=1-apr; WinterU=4; WinterCona=2; DiffusConst=140; DiffusSlope=50; Salb=0.13; CN2Bare=20; CNRed=10; CNCov=0.8; Thickness=[100, 200, 200, 300, 300, 300, 300, 300]; SWCON=[0.9, 0.9, 0.9, 0.2, 0.05, 0.02, 0.01, 0.001]
            Organic: FOMCNRatio=40
              Thickness  Carbon  SoilCNRatio  FBiom  FInert  FOM
              100        3.1     15           0.03   0.1     475.475
              100        2       16           0.02   0.2     303.176
              250        1       18           0.01   0.3     193.314
              150        0.01    20           0.01   1       123.262
              200        0.01    23           0.01   1       67.6477
              200        0.01    23           0.01   1       37.1259
              500        0.01    23           0.01   1       37.126
              500        0.01    23           0.01   1       37.126
            Chemical
              Thickness  NO3N  NH4N  PH
              100        5     5     5.7
              100        2     2     5.6
              250        1     1     5.5
              150        0     0     5.4
              200        0     0     5.4
              200        0     0     5.42226
              500        0     0     5.422
              500        0     0     5.422
            CERESSoilTemperature
            Nutrient
          Irrigation
          Fertiliser
          SurfaceOrganicMatter: InitialResidueName=Pinus; InitialResidueType=Eucalyptus; InitialResidueMass=0; InitialStandingFraction=0; InitialCPR=0; InitialCNR=0
          Manager TreeManagement
            RowSpace = 2.71
            RowWidth = 3.7
            CultivarName = BFG
            PlantingDate = 16-jun
            HarvestAge = 22
            FertAmount = 50
```csharp
using APSIM.Shared.Utilities;
using Models.PMF;
using Models.Core;
using System;

namespace Models
{
    [Serializable] 
    [System.Xml.Serialization.XmlInclude(typeof(Model))]
    public class Script : Model
    {
        [Link] Plant Plant;
        [Link] Clock Clock;
        [Link] Fertiliser Fertiliser;

        public double TimeSincePlanting {get; set;}

        [Description("Spacing (m) between plants within rows")]
        public double RowSpace { get; set; }

        [Description("Spacing (m) between rows")]
        public double RowWidth { get; set; }

        [Description("Cultivar")]
        [Display(Type=DisplayType.CultivarName)]
        public string CultivarName { get; set; }

        [Description("Planting Date (dd-mmm)")]
        public String PlantingDate { get; set; }

        [Description("Harvest Age (years)")]
        public double HarvestAge { get; set; }

        [Description("Amount of fertiliser N to be applied at planting (kg N/ha)")]
        public double FertAmount { get; set; }

        [EventSubscribe("DoManagement")]
        private void OnDoManagement(object sender, EventArgs e)
        {
            double PlantPopulation = 1 / (RowWidth * RowSpace);
            double RowWidthmm = RowWidth * 1000;

            if (DateUtilities.WithinDates(PlantingDate, Clock.Today, PlantingDate) && !Plant.IsAlive)
            {
                Plant.Sow(population: PlantPopulation, 
                    cultivar: CultivarName, 
                    depth: 100, 
                    rowSpacing: RowWidthmm);
                TimeSincePlanting = 0;
                Fertiliser.Apply(Amount: FertAmount, Type: Fertiliser.Types.NO3N);
            }

            if (TimeSincePlanting > HarvestAge && Plant.IsAlive)
            {
               Plant.Harvest();
               Plant.EndCrop();         
               TimeSincePlanting = 0;  
            }

            TimeSincePlanting += 1.0/365.0;
        }
    }
}
```
          Manager TreeThinning
```csharp
using Newtonsoft.Json;
using System;
using System.Collections.Generic;
using Models.Core;
using Models.PMF;
using Models.PMF.Interfaces;
using System.Xml.Serialization;

namespace Models
{
    [Serializable] 
    [System.Xml.Serialization.XmlInclude(typeof(Model))]
    public class Script : Model
    {
        [Link] Plant Pinus;
        [Link] Clock Clock;

        [JsonIgnore] private RemovalFractions Remove { get; set; }
        
        [EventSubscribe("StartOfSimulation")]
        private void OnSimulationCommencing(object sender, EventArgs e)
        {
            Remove = new RemovalFractions();
        }
        
        public void DoThin(double ThinFr)
        {
            //Set up  array of remove fractions to send with Cut method.  Each member in the array corresponds to an organ in the same order they are set up in.

                //Harvest with manager specified removal fractions
                Remove.SetFractionToRemove("Leaf", 0);
                Remove.SetFractionToRemove("Stem", 0);
                Remove.SetFractionToRemove("Branch", 0);
                Remove.SetFractionToRemove("FineRoot", 0);
                Remove.SetFractionToRemove("CoarseRoot", 0);
                Remove.SetFractionToResidue("Leaf", ThinFr);
                Remove.SetFractionToResidue("Stem", ThinFr);
                Remove.SetFractionToResidue("Branch", ThinFr);
                Remove.SetFractionToResidue("FineRoot", ThinFr);
                Remove.SetFractionToResidue("CoarseRoot", ThinFr);
                Remove.SetThinningProportion = ThinFr;
                Pinus.RemoveBiomass("Thin", Remove);
                Pinus.Population = Pinus.Population*(1-ThinFr);
        }
    }
}
```
          Manager TreeThinningFromAboveOrBelow
```csharp
using Newtonsoft.Json;
using System;
using System.Collections.Generic;
using Models.Core;
using Models.PMF;
using Models.PMF.Interfaces;
using System.Xml.Serialization;
using APSIM.Shared.Utilities;
using Models.Interfaces;

namespace Models
{
    [Serializable] 
    [System.Xml.Serialization.XmlInclude(typeof(Model))]
    public class Script : Model
    {
        [Link] Plant Pinus;
        [Link] Clock Clock;

        [JsonIgnore] private RemovalFractions Remove { get; set; }

        [EventSubscribe("StartOfSimulation")]
        private void OnSimulationCommencing(object sender, EventArgs e)
        {
            Remove = new RemovalFractions();
        }
        
        public void DoThin(double ThinFr)
        {
            //Set up  array of remove fractions to send with Cut method.  Each member in the array corresponds to an organ in the same order they are set up in.
			//Set thinning bias away from average for biomass components (not for population), e.g. 0.5 for thinning from below, and 2 for thinning from above, 
			//i.e. average individual tree size changes

        		double ThinBias = 0.7;    	

            	//Harvest with manager specified removal fractions
                Remove.SetFractionToRemove("Leaf", 0);
                Remove.SetFractionToRemove("Stem", 0);
                Remove.SetFractionToRemove("Branch", 0);
                Remove.SetFractionToRemove("FineRoot", 0);
                Remove.SetFractionToRemove("CoarseRoot", 0);
                Remove.SetFractionToResidue("Leaf", ThinFr*ThinBias);
                Remove.SetFractionToResidue("Stem", ThinFr*ThinBias);
                Remove.SetFractionToResidue("Branch", ThinFr*ThinBias);
                Remove.SetFractionToResidue("FineRoot", ThinFr*ThinBias);
                Remove.SetFractionToResidue("CoarseRoot", ThinFr*ThinBias);
                Remove.SetThinningProportion = ThinFr*ThinBias;
                Pinus.RemoveBiomass("Thin", Remove);
                Pinus.Population = Pinus.Population*(1-ThinFr);
        }
    }
}
```
          Manager AutomaticIrrigation
            allowIrrigation = False
            seasonStart = 1-jan
            seasonEnd = 31-dec
            seasonsAllocation = 2000
            triggerDeficit = 90
            targetDeficit = 98
            returndays = 4
            maximumAmount = 15
            depthPAWC = 400
```csharp
using Newtonsoft.Json;
using APSIM.Shared.Utilities;
using System.Xml.Serialization;
using Models.Soils;
using Models.PMF;
using Models.Core;
using System;
using Models.Interfaces;



        
namespace Models
{
    [Serializable] 
    [System.Xml.Serialization.XmlInclude(typeof(Model))]
    public class Script : Model
    {
        [Link] private ISummary summary;
        [Link] private Irrigation Irrigation;
        [Link] private Clock Clock;
        [Link] private Soil Soil;
        [Link(IsOptional = true)] private IPlant existingCrop;
        private DateTime StartDate;
        private DateTime EndDate;
        private double TopDUL;
        private double TopLL;
        private int nLayers;
        [Link]
        private IPhysical soilPhysical;
        [Link]
        private ISoilWater waterBalance;
        //Communication to other modules
       
        //User inputs from properties tab
        [Description("Turn irrigation on?")]
        public bool allowIrrigation { get; set; }
        [Description("Start of irrigation season (dd-MMM)")]
        public string seasonStart { get; set; }
        [Description("End of irrigation season (dd-MMM)")]
        public string seasonEnd { get; set; }
        [Description("Season allocation (mm)")]
        public double seasonsAllocation { get; set; }
        [Description("Deficit to trigger irrigation (% PAWC)")]
        public double triggerDeficit { get; set; }
        [Description("Deficit to stop irrigaton (% PAWC)")]
        public double targetDeficit { get; set; }
        [Description("Minimum days for irrigation to return")]
        public double returndays { get; set; }
        [Description("Maximum irrigation application (mm/day)")]
        public double maximumAmount { get; set; }
        [Description("Depth to calculate PAWC (mm)")]
        public double depthPAWC { get; set; }

        //Class members
        [JsonIgnore] public double TopSWdeficit { get; set; }
        [JsonIgnore] public double TopSWC { get; set; }
        [JsonIgnore] public double DaysSinceIrrigation { get; set; }
        [JsonIgnore] public double AmountToApply { get; set; }
        [JsonIgnore] public double SeasonAppliedAmount { get; set; }
        
        private bool IrrigationIsAllowed { get; set; }
        private bool SeasonIsOpen { get; set; }
        private bool CropIsActive { get; set; }
        private bool IrrigatorIsAvailable { get; set; }
        private bool SoilIsDry { get; set; }



        public void TurnOn()
        {
        allowIrrigation=true;
        IrrigationIsAllowed=true;
        }
        public void TurnOff()
        {
        allowIrrigation=false;
        IrrigationIsAllowed=false;
        }


        //Calculate static soil variables
        [EventSubscribe("StartOfSimulation")]
        private void OnStartOfSimulation(object sender, EventArgs e)
        {   
            //Set the season dates
            StartDate = DateTime.Parse(seasonStart + "-" + Clock.Today.Year.ToString());
            EndDate = DateTime.Parse(seasonEnd + "-" + Clock.Today.Year.ToString());
            
            //Can we irrigate at all?
            IrrigationIsAllowed = false; 
            if (allowIrrigation)
                IrrigationIsAllowed = true; 

            //Calculate soil water variables
            double depthFromSurface = 0.0;
            double fracLayer = 0.0;
            nLayers = soilPhysical.Thickness.Length;
            for (int layer = 0; layer < nLayers; layer++)
            {
                fracLayer = Math.Min(1.0, (depthPAWC - depthFromSurface) / soilPhysical.Thickness[layer]);
                TopLL += soilPhysical.LL15mm[layer] * fracLayer;
                TopDUL += soilPhysical.DULmm[layer] * fracLayer;
                depthFromSurface += soilPhysical.Thickness[layer];
                if (depthFromSurface >= depthPAWC)
                    layer = nLayers;
            }
        }
             
        //Determine daily requirement for irrigation
        [EventSubscribe("StartOfDay")]
        private void OnStartOfDay(object sender, EventArgs e)
        {
            //Can we irrigate today?          
            SeasonIsOpen = isBetween(Clock.Today, StartDate, EndDate);
            if (!SeasonIsOpen)
                SeasonAppliedAmount = 0;

            //Is there a crop in the ground that needs irrigation?
            CropIsActive = false;
            if ((existingCrop != null) && (existingCrop.IsAlive))
                CropIsActive = true;
            //if ((existingCrop.Phenology.Stage >= 3.0) && (existingCrop.Phenology.Stage < 6.0))
          
            //Is the irrigator available?
            IrrigatorIsAvailable = false;
            DaysSinceIrrigation += 1;
            if (DaysSinceIrrigation >= returndays)
                IrrigatorIsAvailable = true;
          
            //Is the soil dry enough to require irrigation?
            SoilIsDry = false;
            double depthFromSurface = 0.0;
            double fracLayer = 0.0;
            TopSWC = 0.0;
            for (int layer = 0; layer < nLayers; layer++)
            //for (int layer = 0; depthFromSurface < depthPAWC + soilPhysical.Thickness[layer]; layer++)
            {
                fracLayer = Math.Min(1.0, (depthPAWC - depthFromSurface) / soilPhysical.Thickness[layer]);
                TopSWC += waterBalance.SWmm[layer] * fracLayer;
                depthFromSurface += soilPhysical.Thickness[layer];
                if (depthFromSurface >= depthPAWC)
                    layer = nLayers;
            }
            
            TopSWdeficit = TopSWC - TopDUL;
            if (Math.Max(0.0, -TopSWdeficit) >= (TopDUL - TopLL) * (100 - triggerDeficit) / 100)
                SoilIsDry = true;
                
            //Are all the conditions ratifying irrigation
            if (IrrigationIsAllowed && SeasonIsOpen && CropIsActive && IrrigatorIsAvailable && SoilIsDry)
            {
                //Lets bloody well irrigate then!!!!
                AmountToApply = TopDUL * targetDeficit / 100 - TopSWC;
                AmountToApply = Math.Max(0.0, Math.Min(AmountToApply, seasonsAllocation - SeasonAppliedAmount));
                AmountToApply = Math.Min(AmountToApply,maximumAmount);
                Irrigation.Apply(AmountToApply);
                DaysSinceIrrigation = 0;
                SeasonAppliedAmount += AmountToApply;
            }
        }
        
        ///Checks whether theDate is between iniDate and endDate (non-year specific)
        private bool isBetween(DateTime theDay, DateTime iniDate, DateTime endDate)
        {
            bool result = false;
            if (iniDate.DayOfYear < endDate.DayOfYear)
            {
                // period is within one year, ex: summer in the northern hemisphere
                if ((theDay.DayOfYear >= iniDate.DayOfYear) && (theDay.DayOfYear <= endDate.DayOfYear))
                    result = true;
            }
            else
            {
                // period goes over the end of the year, ex: summer in the southern hemisphere
                if ((theDay.DayOfYear >= iniDate.DayOfYear) || (theDay.DayOfYear <= endDate.DayOfYear))
                    result = true;
            }
            
            return result;
        }
    }
}
```
          Operations Management
          Plant Pinus: IsAlive=false; IsEnding=false; DaysAfterEnding=0
            Memo
              Root:shoot ratio, and allometric relationships for height (Ht, m), stem diameter (DBH, cm, over bark at 1.3 m height), and their derivatives (stem volume Vol, and mean annual increment MAI) were developed as a function of above-ground biomass from [almeida2003application], [almeida2004parameterisation], [borges2009parametrizaccao], [cromer1993response], and [norgueira2005estadonutricional]. Similarly, above-ground biomass as a function of stem weight or wood weight was developed from the same datasets plus [turner1986organic], [byrne1989above], [bradstock1981biomass], [polglase1995mineralization], [snow1999nitrogen], [snow1999modelling], [myers1996growth], [myers1998response], and [melo2015responses].
            AccumulateFunction Age: same as Replacements.Pinus.Age
            Phenology
              StageBasedInterpolation StageCode: Stages=[Emergence, EndJuvenile, Maturity, Old]; Codes=[1, 2, 3, 4]; Proportional=true
              Constant ThermalTime: FixedValue=1; Units=^od
              GerminatingPhase Germinating: same as Replacements.Pinus.Phenology.Germinating
              EmergingPhase Emerging: ShootLag=1; ShootRate=0; Start=Germination; End=Emergence; TTForTimeStep=0
                VariableReference ThermalTime: VariableName=[Phenology].ThermalTime
              GenericPhase Juvenile: Start=Emergence; End=EndJuvenile
                Constant Progression: FixedValue=1; Units=^od
                Constant Target: FixedValue=365; Units=^o
              GenericPhase Mature: Start=EndJuvenile; End=Maturity
                Constant Progression: FixedValue=1; Units=^od
                Constant Target: FixedValue=1825; Units=^o
              GenericPhase Declining: Start=Maturity; End=Old
                Constant Progression: FixedValue=1; Units=^od
                Constant Target: FixedValue=27010; Units=^o
              EndPhase Old: Start=Old; End=Unused
                Constant ThermalTime: FixedValue=1; Units=^od
            OrganArbitrator Arbitrator: same as Replacements.Pinus.Arbitrator
            CompositeBiomass AboveGround: DMDOfStructural=0.6
              Propertys=[[Branch].Live, [Branch].Dead, [Leaf].Live, [Leaf].Dead, [Stem].Live, [Stem].Dead]
            CompositeBiomass BelowGround: DMDOfStructural=0.6
              Propertys=[[FineRoot].Live, [FineRoot].Dead, [CoarseRoot].Live, [CoarseRoot].Dead]
            CompositeBiomass Wood: Propertys=[[Stem].Live, [Stem].Dead, [Branch].Live, [Branch].Dead]; DMDOfStructural=0.6
            CompositeBiomass Total: DMDOfStructural=0.6
              Propertys=[[Leaf].Live, [Leaf].Dead, [Stem].Live, [Stem].Dead, [FineRoot].Live, [FineRoot].Dead, [CoarseRoot].Live, [CoarseRoot].Dead]
              Memo
                Note that this  property does not include branches.
            CompositeBiomass TotalLive: DMDOfStructural=0.6
              Propertys=[[Leaf].Live, [Stem].Live, [FineRoot].Live, [CoarseRoot].Live, [Branch].Live]
              Memo
                Note that this  property does not include branches, and it is used to calculate IndividualTreeLiveWt.
            CompositeBiomass TotalDead: DMDOfStructural=0.6
              Propertys=[[Leaf].Dead, [Stem].Dead, [FineRoot].Dead, [CoarseRoot].Dead]
              Memo
                Note that this  property does not include branches.
            DivideFunction IndividualTreeLiveWt
              VariableReference LiveWt: VariableName=[Pinus].TotalLive.Wt
              VariableReference Population: VariableName=[Pinus].Population
              Memo
                Note that this  property does not include branches. It is used in calculating DM Demands of several plant components.
            DivideFunction IndividualTreeStemWt
              VariableReference LiveWt: VariableName=[Pinus].Stem.Wt
              VariableReference Population: VariableName=[Pinus].Population
            PerennialLeaf Leaf: MaintenanceRespiration=0; GrowthRespiration=0; Albedo=0.15; Gsmax350=0.005; R50=200; LAI=0; Height=0; FRGR=0; PotentialEP=0; WaterDemand=0
              ExpressionFunction CO2internal: Expression=(163 - [IWeather].MeanT)/(5 - 0.1*[IWeather].MeanT)
              DivideFunction StomatalConductanceCO2Modifier
                VariableReference FCO2: VariableName=[Leaf].Photosynthesis.FCO2
                ExpressionFunction RelativeCO2Gradient
                  Expression=([IWeather].CO2 - [Leaf].CO2internal)/(350 - [Leaf].CO2internal)
              MultiplyFunction InitialWtFunction: same as Replacements.Pinus.Leaf.InitialWtFunction
              Constant LaiDeadFunction: FixedValue=0; Units=m^2/m^2
              MinimumFunction FRGRFunction
                HourlyInterpolation FRGRFunctionTemp: agregationMethod=0
                  XYPairs Response: X=[5, 20, 25, 35]; Y=[0, 1, 1, 0]
                    Memo
                      This is an assumed temperature response function.
                  ThreeHourSin InterpolationMethod
              ExpressionFunction ExtinctionCoefficient
                Expression=([ExtinctionCoefficient].KMatureTrees+([ExtinctionCoefficient].KYoungTrees-[ExtinctionCoefficient].KMatureTrees)*Exp((0-2)*([Pinus].Leaf.LAI/[ExtinctionCoefficient].LAIIntermediateK)^[ExtinctionCoefficient].ShapeCurve))
                Constant KYoungTrees: FixedValue=0.5
                Constant KMatureTrees: FixedValue=0.5
                Constant LAIIntermediateK: FixedValue=0.7
                Constant ShapeCurve: FixedValue=2
                Memo
                  A value of 0.50 is commonly used for Pinus ([macfarlane2007estimation]).
              Constant ExtinctionCoefficientDead: FixedValue=0.5
              Constant MaximumNConc: FixedValue=0.03; Units=g/g
                Memo
                  Foliar N concentrations are based on [leuning1991spatial].
              Constant MinimumNConc: FixedValue=0.01; Units=g/g
                Memo
                  This is an assumed value.
              Constant NReallocationFactor: FixedValue=0; Units=/d
                Memo
                  A value of zero assumes there is no N reallocation.
              WeightedTemperatureFunction SenescenceRate: MaximumTemperatureWeighting=0
                XYPairs: X=[-5, -2, 0, 2, 2.1]; Y=[0, 0, 0, 0, 0]
              BiomassRemoval BiomassRemovalDefaults
                OrganBiomassRemovalType Harvest: FractionLiveToRemove=0; FractionDeadToRemove=0; FractionLiveToResidue=0.99; FractionDeadToResidue=0.99
                OrganBiomassRemovalType Cut: FractionLiveToRemove=0.8; FractionDeadToRemove=0; FractionLiveToResidue=0; FractionDeadToResidue=0
                OrganBiomassRemovalType Prune: FractionLiveToRemove=0; FractionDeadToRemove=0; FractionLiveToResidue=0.6; FractionDeadToResidue=0
                Memo
                  Values in this table reflect the live and dead fractions that are either removed from the system or transferred to the residue pool. Harvest, Cut and Prune methods will affect these values, but default values assume for Harvest assume delimbing at the stump.
              Constant DMConversionEfficiency: FixedValue=1; Units=g/g
              Constant LeafDetachmentTime: FixedValue=14; Units=d
                Memo
                  A value here is the number of days between senseence and detachment. A value of 14 days is assumed.
              Constant DetachmentRateFunction: FixedValue=0; Units=/d
                Memo
                  A value for DetachmentRateFunction is required in Leaf, Branch, Stem and CoarseRoot components of the model, but a zero value means that immediate detachment has been triggered. A non-zero option might be useful in the future for defining some genotypes.

                  The same explanation applies to zero values below for retranslocation factors.
              Constant DMRetranslocationFactor: FixedValue=0; Units=/d
              Constant NRetranslocationFactor: FixedValue=0; Units=/d
              RUEModel Photosynthesis
                Constant RUE: FixedValue=1.4; Units=g/MJ
                  Memo
                    Aboveground RUE for Gliricidia was measured as 1.06 g/MJ by [harrington1995radiation]. Adding c. 0.3 for belowground allocation provides a value of 1.4 g/MJ.
                MinimumFunction FT
                  WeightedTemperatureFunction FTDaytime: MaximumTemperatureWeighting=0.75
                    XYPairs: X=[5, 20, 25, 35]; Y=[0, 1, 1, 0]
                  WeightedTemperatureFunction FTFrost: MaximumTemperatureWeighting=0
                    XYPairs: X=[-5, 0, 2]; Y=[1, 1, 1]
                LinearInterpolationFunction FVPD
                  XYPairs: X=[0, 10, 50]; Y=[1, 1, 0]
                  VariableReference XValue: VariableName=[Leaf].Photosynthesis.VPD
                LinearInterpolationFunction FN
                  XYPairs: X=[0, 1, 1.5]; Y=[0, 1, 1]
                  VariableReference XValue: VariableName=[Leaf].Fn
                LinearInterpolationFunction FW
                  XYPairs: X=[0, 1, 1.5]; Y=[0, 1, 1]
                  VariableReference XValue: VariableName=[Leaf].Fw
                RUECO2Function FCO2: PhotosyntheticPathway=C3
                VariableReference RadnInt: VariableName=[Leaf].RadiationIntercepted
              Constant LeafKillFraction: FixedValue=0; Units=0-1
                Memo
                  A value of zero assumes that no leaves are killed initially, but this value could be reset in an Operation to reflect, for example, an insect browsing attack, frost kill of Leaf, or a pruning operation that removes leaves.
              Constant MinimumLAI: FixedValue=0.01; Units=m^2/m^2
              MultiplyFunction SpecificLeafAreaFunction
                LinearInterpolationFunction SpecificLeafAreaPot
                  XYPairs: X=[0, 1, 2, 3, 8]; Y=[0.016, 0.0105, 0.0089, 0.0085, 0.0073]
                  Memo
                    Data for SLA (m^2/g)came from [borges2009parametrizaccao] and [almeida2003comparison]. Values and trends were similar. A generalised pattern should suffice for many applicatinos, but cultivar-specific patterns are available for some cultivars and could be used to slighly refine their simulation. These data are also similar to those in [rance2014assessment].
                  VariableReference XValue: VariableName=[Pinus].Age
                LinearInterpolationFunction CO2Modifier
                  XYPairs: X=[350, 850]; Y=[1, 0.8]
                  VariableReference XValue: VariableName=[IWeather].CO2
              LinearInterpolationFunction LeafResidenceTime
                XYPairs: X=[0, 1, 2, 3, 8]; Y=[100, 140, 180, 220, 280]
                Memo
                  This function specifies that lead residence time increases with age. Values are based on [laclau2009influence].
                VariableReference XValue: VariableName=[Pinus].Age
              MultiplyFunction LeafDevelopmentRate
                Constant LDR: FixedValue=1; Units=0-1
                WeightedTemperatureFunction FT: MaximumTemperatureWeighting=1
                  XYPairs: X=[10, 26, 33, 34]; Y=[0, 1, 1, 0]
                    Memo
                      This is an assumed and tuned function of Leaf development rate in relation to weighted air temperature.
              Constant CarbonConcentration: FixedValue=0.45; Units=g/g
                Memo
                  This value is based on [ribeiro2015aboveground].
              ExpressionFunction HeightFunction: Expression=[Stem].Ht*1000
                Memo
                  This converts stem height in m to mm for use else where in the model.
              BiomassDemand DMDemands
                Memo: same as Replacements.Pinus.Leaf.DMDemands.Memo
                MultiplyFunction Structural
                  PartitionFractionDemandFunction DMDemandFunction
                    LinearInterpolationFunction PartitionFraction
                      XYPairs: X=[0, 1000, 10000]; Y=[0.19, 0.19, 0.2]
                      VariableReference XValue: VariableName=[Pinus].IndividualTreeLiveWt
                  Constant StructuralFraction: FixedValue=0.99; Units=0-1
                Constant Metabolic: FixedValue=0
                Constant Storage: FixedValue=0
              BiomassDemand NDemands: same as Replacements.Pinus.Leaf.NDemands
            GenericOrgan Branch: IsAboveGround=true
              Memo
                For many of the parameters in this organ, see comments for similar parameters in the Leaf organ.
              Constant NReallocationFactor: FixedValue=0; Units=/d
              Constant NRetranslocationFactor: FixedValue=0.05; Units=/d
              PhaseLookupValue NitrogenDemandSwitch: Start=Emergence; End=Old
                Constant: FixedValue=1
              Constant DMRetranslocationFactor: FixedValue=0; Units=/d
              Constant SenescenceRate: FixedValue=0; Units=/d
              Constant MaximumNConc: FixedValue=0.01; Units=g/g
              Constant MinimumNConc: FixedValue=0.0014; Units=g/g
              Constant DetachmentRateFunction: FixedValue=0; Units=/d
              Constant MaintenanceRespirationFunction: FixedValue=0; Units=0-1
              Constant DMConversionEfficiency: FixedValue=1; Units=0-1
              BiomassRemoval BiomassRemovalDefaults
                OrganBiomassRemovalType Harvest: FractionLiveToRemove=0; FractionDeadToRemove=0; FractionLiveToResidue=1; FractionDeadToResidue=1
                OrganBiomassRemovalType Cut: FractionLiveToRemove=0.8; FractionDeadToRemove=0; FractionLiveToResidue=0; FractionDeadToResidue=0
                OrganBiomassRemovalType Prune: FractionLiveToRemove=0; FractionDeadToRemove=0; FractionLiveToResidue=0.6; FractionDeadToResidue=0
                OrganBiomassRemovalType Thin: FractionLiveToRemove=0; FractionDeadToRemove=0; FractionLiveToResidue=0.05; FractionDeadToResidue=0
              Constant DMReallocationFactor: FixedValue=0; Units=/d
              VariableReference CriticalNConc: VariableName=[Branch].MinimumNConc
              Constant RemobilisationCost: FixedValue=0
              Constant CarbonConcentration: FixedValue=0.45; Units=g/g
              BiomassDemandAndPriority DMDemands
                Memo
                  DM or N demands here are set in a similar way to those described above for the Leaf organ.
                MultiplyFunction Structural
                  PartitionFractionDemandFunction DMDemandFunction
                    LinearInterpolationFunction PartitionFraction
                      XYPairs: X=[0, 1000, 10000]; Y=[0.06, 0.06, 0.06]
                      VariableReference XValue: VariableName=[Pinus].IndividualTreeLiveWt
                  Constant StructuralFraction: FixedValue=0.99; Units=0-1
                Constant Metabolic: FixedValue=0
                StorageDMDemandFunction Storage
                  SubtractFunction StorageFraction
                    Constant One: FixedValue=1
                    VariableReference StructuralFraction: VariableName=[Branch].DMDemands.Structural.StructuralFraction
                Constant QStructuralPriority: FixedValue=1
                Constant QMetabolicPriority: FixedValue=1
                Constant QStoragePriority: FixedValue=1
              BiomassDemandAndPriority NDemands: same as Replacements.Pinus.Branch.NDemands
              RetranslocateNonStructural RetranslocateNitrogen
              BiomassDemand InitialWt
                Constant Structural: FixedValue=0; Units=g
                Constant Metabolic: FixedValue=0
                Constant Storage: FixedValue=0
              Constant Photosynthesis: FixedValue=0
              VariableReference initialNConcFunction: VariableName=[Branch].MinimumNConc
            GenericOrgan Stem: IsAboveGround=true
              Memo
                For many of the parameters in this organ, see comments for similar parameters in the Leaf organ.
              Constant NReallocationFactor: FixedValue=0; Units=/d
              Constant NRetranslocationFactor: FixedValue=0.05; Units=/d
              PhaseLookupValue NitrogenDemandSwitch: Start=Emergence; End=Old
                Constant: FixedValue=1
              Constant DMRetranslocationFactor: FixedValue=0; Units=/d
              Constant SenescenceRate: FixedValue=0; Units=/d
              Constant MaximumNConc: FixedValue=0.01; Units=g/g
                Memo
                  Branch, stem and coarse root minimum N concentrations are based on [raymond2000effect].
              Constant MinimumNConc: FixedValue=0.0014; Units=g/g
              Constant DetachmentRateFunction: FixedValue=0; Units=/d
              Constant MaintenanceRespirationFunction: FixedValue=0; Units=0-1
              Constant DMConversionEfficiency: FixedValue=1; Units=0-1
              BiomassRemoval BiomassRemovalDefaults
                OrganBiomassRemovalType Harvest: FractionLiveToRemove=1; FractionDeadToRemove=1; FractionLiveToResidue=0; FractionDeadToResidue=0
                OrganBiomassRemovalType Cut: FractionLiveToRemove=0.8; FractionDeadToRemove=0; FractionLiveToResidue=0; FractionDeadToResidue=0
                OrganBiomassRemovalType Prune: FractionLiveToRemove=0; FractionDeadToRemove=0; FractionLiveToResidue=0.6; FractionDeadToResidue=0
                OrganBiomassRemovalType Thin: FractionLiveToRemove=0; FractionDeadToRemove=0; FractionLiveToResidue=0.05; FractionDeadToResidue=0
              Constant DMReallocationFactor: FixedValue=0; Units=/d
              VariableReference CriticalNConc: VariableName=[Stem].MinimumNConc
              Constant CarbonConcentration: FixedValue=0.45; Units=g/g
              Constant RemobilisationCost: FixedValue=0
              ExpressionFunction DBH: Expression=0.685*([Pinus].AboveGround.Wt^0.3262)
              MaximumFunction Ht
                ExpressionFunction HeightFunction: Expression=0.5201*([Pinus].Stem.DBH^1.3604)
                Constant MinimumHeight: FixedValue=0.1; Units=m
              LessThanFunction Vol
                VariableReference Height: VariableName=[Stem].Ht
                Constant MinimumHeight: FixedValue=2
                Constant Zero: FixedValue=0
                ExpressionFunction VolumeEquation
                  Expression=(((((([Pinus].Stem.DBH)/2)^2)*3.14159)/3)*([Pinus].Stem.Ht*100))*[Pinus].Population*10000/1000000
                  Memo
                    Stem volume is calculated as concical volume with the base of the cone the same diameter as at breast height (1.3 m height). Units are m3 stem/ha.
              ExpressionFunction MAI: Expression=[Pinus].Stem.Vol/[Pinus].Age
                Memo
                  MAI = Mean Annual Increment (m3/ha/year) of stem

                  MAI, which is based on stem volume, depends entirely on the allometric equation used for DBH, and on which Ht in-turn is direclty based. The Brazilian dataset on which these relationships were based did not include large trees. It is likely that the relationships over-predict DBH, Ht, Vol and MAI at larger sizes than included in the calibration dataset, which may have been a problem for the Gympie and Coffs sites. Although Coffs in the validation dataset included large trees, DBH and Ht data were not avialable from that site to include in the calibration. The developers of this model encourage redefinition of the DBH, Ht and Vol functions for specific future applications that include large trees.
              BiomassDemandAndPriority DMDemands
                Memo
                  DM or N demands here are set in a similar way to those described above for the Leaf organ.
                MultiplyFunction Structural
                  PartitionFractionDemandFunction DMDemandFunction
                    LinearInterpolationFunction PartitionFraction
                      XYPairs: X=[0, 2000, 10000]; Y=[0.35, 0.45, 0.58]
                      VariableReference XValue: VariableName=[Pinus].IndividualTreeLiveWt
                  Constant StructuralFraction: FixedValue=0.99; Units=0-1
                Constant Metabolic: FixedValue=0
                StorageDMDemandFunction Storage
                  SubtractFunction StorageFraction
                    Constant One: FixedValue=1
                    VariableReference StructuralFraction: VariableName=[Stem].DMDemands.Structural.StructuralFraction
                Constant QStructuralPriority: FixedValue=1
                Constant QMetabolicPriority: FixedValue=1
                Constant QStoragePriority: FixedValue=1
              BiomassDemandAndPriority NDemands
                Memo
                  DM or N demands here are set in a similar way to those described above for the Leaf organ.
                MultiplyFunction Structural
                  VariableReference MinNconc: VariableName=[Stem].minimumNconc
                  VariableReference PotentialDMAllocation: VariableName=[Stem].potentialDMAllocation.Structural
                MultiplyFunction Metabolic: same as Replacements.Pinus.Stem.NDemands.Metabolic
                StorageNDemandFunction Storage
                  VariableReference NitrogenDemandSwitch: VariableName=[Stem].nitrogenDemandSwitch
                  VariableReference MaxNconc: VariableName=[Stem].maximumNconc
                Constant QStructuralPriority: FixedValue=1
                Constant QMetabolicPriority: FixedValue=1
                Constant QStoragePriority: FixedValue=1
              RetranslocateNonStructural RetranslocateNitrogen
              BiomassDemand InitialWt
                Constant Structural: FixedValue=0; Units=g
                Constant Metabolic: FixedValue=0
                Constant Storage: FixedValue=0
              Constant Photosynthesis: FixedValue=0
              VariableReference initialNConcFunction: VariableName=[Stem].MinimumNConc
            GenericOrgan CoarseRoot: IsAboveGround=true
              Memo
                For many of the parameters in this organ, see comments for similar parameters in the Leaf organ.
              Constant NReallocationFactor: FixedValue=0; Units=/d
              Constant NRetranslocationFactor: FixedValue=0.05; Units=/d
              PhaseLookupValue NitrogenDemandSwitch: Start=Emergence; End=Old
                Constant: FixedValue=1
              Constant DMRetranslocationFactor: FixedValue=0; Units=0-1
              Constant SenescenceRate: FixedValue=0; Units=/d
              Constant MaximumNConc: FixedValue=0.01; Units=g/g
              Constant MinimumNConc: FixedValue=0.0014; Units=g/g
              Constant DetachmentRateFunction: FixedValue=0; Units=/d
              Constant MaintenanceRespirationFunction: FixedValue=0; Units=0-1
              Constant DMConversionEfficiency: FixedValue=1; Units=0-1
              BiomassRemoval BiomassRemovalDefaults: same as Plantation_IxF_Experiment.Treatment.Base.Plantation.Pinus.Branch.BiomassRemovalDefaults
              Constant DMReallocationFactor: FixedValue=0; Units=0-1
              VariableReference CriticalNConc: VariableName=[Stem].MinimumNConc
              Constant RemobilisationCost: FixedValue=0
              Constant CarbonConcentration: FixedValue=0.45; Units=g/g
              BiomassDemandAndPriority DMDemands
                Memo
                  DM or N demands here are set in a similar way to those described above for the Leaf organ.
                MultiplyFunction Structural
                  PartitionFractionDemandFunction DMDemandFunction
                    LinearInterpolationFunction PartitionFraction
                      XYPairs: X=[0, 1000, 10000]; Y=[0.01, 0.03, 0.05]
                      VariableReference XValue: VariableName=[Pinus].IndividualTreeLiveWt
                  Constant StructuralFraction: FixedValue=0.99; Units=0-1
                Constant Metabolic: FixedValue=0
                StorageDMDemandFunction Storage
                  SubtractFunction StorageFraction
                    Constant One: FixedValue=1
                    VariableReference StructuralFraction: VariableName=[CoarseRoot].DMDemands.Structural.StructuralFraction
                Constant QStructuralPriority: FixedValue=1
                Constant QMetabolicPriority: FixedValue=1
                Constant QStoragePriority: FixedValue=1
              BiomassDemandAndPriority NDemands
                Memo
                  DM or N demands here are set in a similar way to those described above for the Leaf organ.
                MultiplyFunction Structural
                  VariableReference MinNconc: VariableName=[CoarseRoot].minimumNconc
                  VariableReference PotentialDMAllocation: VariableName=[CoarseRoot].potentialDMAllocation.Structural
                MultiplyFunction Metabolic: same as Replacements.Pinus.CoarseRoot.NDemands.Metabolic
                StorageNDemandFunction Storage
                  VariableReference NitrogenDemandSwitch: VariableName=[CoarseRoot].nitrogenDemandSwitch
                  VariableReference MaxNconc: VariableName=[CoarseRoot].maximumNconc
                Constant QStructuralPriority: FixedValue=1
                Constant QMetabolicPriority: FixedValue=1
                Constant QStoragePriority: FixedValue=1
              RetranslocateNonStructural RetranslocateNitrogen
              BiomassDemand InitialWt
                Constant Structural: FixedValue=0; Units=g
                Constant Metabolic: FixedValue=0
                Constant Storage: FixedValue=0
              Constant Photosynthesis: FixedValue=0
              VariableReference initialNConcFunction: VariableName=[CoarseRoot].MinimumNConc
            Root FineRoot: GrowthRespiration=0; MaintenanceRespiration=0
              RootShapeCylinder RootShape
              Memo
                For many of the parameters in this organ, see comments for similar parameters in the Leaf organ.
              PhaseLookupValue NitrogenDemandSwitch: Start=Emergence; End=Old
                Constant: FixedValue=1
              Constant RootFrontVelocity: same as Replacements.Pinus.FineRoot.RootFrontVelocity
              Constant SenescenceRate: FixedValue=0.005; Units=/d
              Constant MaxDailyNUptake: FixedValue=6; Units=kg/ha/d
              Constant MaximumNConc: FixedValue=0.01; Units=g/g
                Memo
                  Fine root N concentrations are based on [gordon2000nutrient].
              Constant MinimumNConc: FixedValue=0.003; Units=g/g
              Constant MaximumRootDepth: FixedValue=10000; Units=mm
              Constant KLModifier: FixedValue=1
              Constant KNO3: FixedValue=0.03
              Constant KNH4: FixedValue=3e-06
              LinearInterpolationFunction NUptakeSWFactor
                XYPairs: X=[0, 1]; Y=[0, 1]
                VariableReference XValue: VariableName=[Root].RWC
              Constant SpecificRootLength: FixedValue=40; Units=m/g
                Memo
                  Specific root length was based on [jourdan2008fine].
              BiomassRemoval BiomassRemovalDefaults
                OrganBiomassRemovalType Harvest: FractionLiveToRemove=0; FractionDeadToRemove=0; FractionLiveToResidue=1; FractionDeadToResidue=1
                OrganBiomassRemovalType Cut: FractionLiveToRemove=0.8; FractionDeadToRemove=0; FractionLiveToResidue=0; FractionDeadToResidue=0
                OrganBiomassRemovalType Prune: FractionLiveToRemove=0; FractionDeadToRemove=0; FractionLiveToResidue=0.6; FractionDeadToResidue=0
              Constant DMConversionEfficiency: FixedValue=1; Units=0-1
              Constant MaintenanceRespirationFunction: FixedValue=0; Units=0-1
              Constant RemobilisationCost: FixedValue=0
              Constant CarbonConcentration: FixedValue=0.45; Units=g/g
              BiomassDemandAndPriority DMDemands
                Memo
                  DM or N demands here are set in a similar way to those described above for the Leaf organ.
                MultiplyFunction Structural
                  PartitionFractionDemandFunction DMDemandFunction
                    Constant PartitionFraction: FixedValue=0.25
                  Constant StructuralFraction: FixedValue=1
                Constant Metabolic: FixedValue=0
                StorageDMDemandFunction Storage
                  SubtractFunction StorageFraction
                    Constant One: FixedValue=1
                    VariableReference StructuralFraction: VariableName=[FineRoot].DMDemands.Structural.StructuralFraction
                Constant QStructuralPriority: FixedValue=1
                Constant QMetabolicPriority: FixedValue=1
                Constant QStoragePriority: FixedValue=1
              BiomassDemandAndPriority NDemands
                Memo
                  DM or N demands here are set in a similar way to those described above for the Leaf organ.
                MultiplyFunction Structural
                  VariableReference MinNconc: VariableName=[FineRoot].minimumNconc
                  VariableReference PotentialDMAllocation: VariableName=[FineRoot].potentialDMAllocation.Structural
                MultiplyFunction Metabolic: same as Replacements.Pinus.FineRoot.NDemands.Metabolic
                StorageNDemandFunction Storage
                  VariableReference NitrogenDemandSwitch: VariableName=[FineRoot].nitrogenDemandSwitch
                  VariableReference MaxNconc: VariableName=[FineRoot].maximumNconc
                Constant QStructuralPriority: FixedValue=1
                Constant QMetabolicPriority: FixedValue=1
                Constant QStoragePriority: FixedValue=1
              VariableReference CriticalNConc: VariableName=[Root].MinimumNConc
              BiomassDemand InitialWt
                Constant Structural: FixedValue=0.2; Units=g/plant
                Constant Metabolic: FixedValue=0
                Constant Storage: FixedValue=0
              Constant RootDepthStressFactor: FixedValue=1
            DivideFunction RootShootRatio
              VariableReference Numerator: VariableName=[Pinus].BelowGround.Wt
              VariableReference Denominator: VariableName=[Pinus].AboveGround.Wt
            CultivarFolder grandis
              Cultivar grandis
                Memo Genotype note
                  This genotype specification was originally planned to be for the species E. grandis in general, but we did not actually provide any specific parameters. As no parameter values were changed here, generic Pinus parameters were used where this genotype was specified in a simulation.
              Cultivar grandisCoffsHarbour
                Memo Genotype note
                  This genotype specification is for a Coffs Harbour provenance of E. grandis, but as no actually genotype-specific parameters are specified, simulations using this genotype use the unchanged parameter set of the main Pinus model.
              Cultivar grandisC15
                Command:
                  [CoarseRoot].DMDemands.Structural.DMDemandFunction.PartitionFraction.XYPairs.X=0,1000,10000
                  [CoarseRoot].DMDemands.Structural.DMDemandFunction.PartitionFraction.XYPairs.Y=0,0.03,0.07
                  [Leaf].DMDemands.Structural.DMDemandFunction.PartitionFraction.XYPairs.X=0,1000,5000,10000,20000,50000,80000
                  [Leaf].DMDemands.Structural.DMDemandFunction.PartitionFraction.XYPairs.Y=0.1,0.19,0.24,0.24,0.23,0.22,0.15
                  [Branch].DMDemands.Structural.DMDemandFunction.PartitionFraction.XYPairs.X=0,1000,10000,20000,50000,80000
                  [Branch].DMDemands.Structural.DMDemandFunction.PartitionFraction.XYPairs.Y=.06,.06,.06,.06,.06,.06
                  [FineRoot].DMDemands.Structural.DMDemandFunction.PartitionFraction.FixedValue=0.27
                  [Stem].DMDemands.Structural.DMDemandFunction.PartitionFraction.XYPairs.X=0,1000,5000,10000,20000,30000,80000
                  [Stem].DMDemands.Structural.DMDemandFunction.PartitionFraction.XYPairs.Y=0.2,0.45,0.9,0.99,0.99,0.99,.99
                Memo Genotype note
                  This genotype specification was used to specifiy partitioning to for the C15 clone used by the Aracruz company (now Fibria), in order to approximate the root:shoot ratios reported in [almeida].
              Cultivar grandisC22
                Command:
                  [CoarseRoot].DMDemands.Structural.DMDemandFunction.PartitionFraction.XYPairs.X=0,1000,10000
                  [CoarseRoot].DMDemands.Structural.DMDemandFunction.PartitionFraction.XYPairs.Y=0,0.07,0.10
                  [Leaf].DMDemands.Structural.DMDemandFunction.PartitionFraction.XYPairs.X=0,1000,5000,10000,20000,50000,80000
                  [Leaf].DMDemands.Structural.DMDemandFunction.PartitionFraction.XYPairs.Y=0.1,0.16,0.24,0.17,.16,0.15,.1
                  [Branch].DMDemands.Structural.DMDemandFunction.PartitionFraction.XYPairs.X=0,1000,10000,20000,50000,80000
                  [Branch].DMDemands.Structural.DMDemandFunction.PartitionFraction.XYPairs.Y=.06,.06,.06,.05,.04,.03
                  [FineRoot].DMDemands.Structural.DMDemandFunction.PartitionFraction.FixedValue=0.27
                  [Stem].DMDemands.Structural.DMDemandFunction.PartitionFraction.XYPairs.X=0,1000,5000,10000,20000,30000,80000
                  [Stem].DMDemands.Structural.DMDemandFunction.PartitionFraction.XYPairs.Y=0.2,0.45,0.5,0.6,0.9,0.9,.9
                Memo Genotype note
                  This genotype specification was used to specifiy partitioning to for the C22 clone used by the Aracruz company (now Fibria), in order to approximate the root:shoot ratios reported in [almeida].
            CultivarFolder grandisXurophylla
              Cultivar grandisXurophylla
                Memo Genotype note
                  This genotype specification was originally planned to be for a cline of grandisXurophylla, but we did not actually provide any specific parameters. As no parameter values were changed here, generic Pinus parameters were used where this genotype was specified in a simulation.
              Cultivar grandisXurophyllaC3334
                Memo Genotype note
                  This genotype specification was originally planned to be for the clone C3334, but we did not actually provide any specific parameters. As no parameter values were changed here, generic Pinus parameters were used where this genotype was specified in a simulation.
              Cultivar grandisXurophyllaC3336
                Memo Genotype note
                  This genotype specification was originally planned to be for the clone C3336, but we did not actually provide any specific parameters. As no parameter values were changed here, generic Pinus parameters were used where this genotype was specified in a simulation.
            CultivarFolder urophyllaXglobulus
              Cultivar urophyllaXglobulus
                Memo Genotype note
                  This genotype specification was originally planned to be for the urophyllaXglobulus hybird of E. grandis, but we did not actually provide any specific parameters. As no parameter values were changed here, generic Pinus parameters were used where this genotype was specified in a simulation.
            CultivarFolder BrazilClones
              Cultivar BrazilPlasticClone
                Command:
                  [Leaf].Photosynthesis.RUE.FixedValue = 1.51
                  [Leaf].ExtinctionCoefficient.KYoungTrees.FixedValue = 0.34
                  [Leaf].ExtinctionCoefficient.KMatureTrees.FixedValue = 0.60
                  [Stem].DMDemands.Structural.DMDemandFunction.PartitionFraction.XYPairs.X=0,2000,10000
                  [Stem].DMDemands.Structural.DMDemandFunction.PartitionFraction.XYPairs.Y=0.15, 0.39, 0.61
                  [Branch].DMDemands.Structural.DMDemandFunction.PartitionFraction.XYPairs.X=0,2000,10000
                  [Branch].DMDemands.Structural.DMDemandFunction.PartitionFraction.XYPairs.Y=0.09,0.09,0.09
                  [Leaf].DMDemands.Structural.DMDemandFunction.PartitionFraction.XYPairs.X=0,2000,10000
                  [Leaf].DMDemands.Structural.DMDemandFunction.PartitionFraction.XYPairs.Y= 0.2, 0.17, 0.15
                  [Leaf].Photosynthesis.FT.FTDaytime.XYPairs.X=  8, 18, 23, 40
                  [Leaf].Photosynthesis.FT.FTDaytime.XYPairs.Y 0, 1, 1, 0
                  [Leaf].Photosynthesis.FT.FTFrost.XYPairs.X= -5, -2, -1, 0, 1, 2, 2.1
                  [Leaf].Photosynthesis.FT.FTFrost.XYPairs.Y = 0, 0, 0, 0, 0, 0.9, 1
                  [Leaf].SenescenceRate.XYPairs.X=  -5,  -2,  0,    2,  2.1
                  [Leaf].SenescenceRate.XYPairs.Y = 0.7, 0.5, 0.2, 0.1, 0
                  [CoarseRoot].DMDemands.Structural.DMDemandFunction.PartitionFraction.XYPairs.X=0,2000,10000
                  [CoarseRoot].DMDemands.Structural.DMDemandFunction.PartitionFraction.XYPairs.Y=0.005,0.03,0.04
                  [FineRoot].DMDemands.Structural.DMDemandFunction.PartitionFraction.FixedValue = 0.26
              Cultivar BrazilTropicalClone
                Command:
                  [Leaf].Photosynthesis.RUE.FixedValue = 1.69
                  [Leaf].ExtinctionCoefficient.KYoungTrees.FixedValue = 0.30
                  [Leaf].ExtinctionCoefficient.KMatureTrees.FixedValue = 0.56
                  [Stem].DMDemands.Structural.DMDemandFunction.PartitionFraction.XYPairs.X=0,2000,10000
                  [Stem].DMDemands.Structural.DMDemandFunction.PartitionFraction.XYPairs.Y=0.15,0.40, 0.64
                  [Branch].DMDemands.Structural.DMDemandFunction.PartitionFraction.XYPairs.X=0,2000,10000
                  [Branch].DMDemands.Structural.DMDemandFunction.PartitionFraction.XYPairs.Y=0.08,0.08,0.08
                  [Leaf].DMDemands.Structural.DMDemandFunction.PartitionFraction.XYPairs.X=0,2000,10000
                  [Leaf].DMDemands.Structural.DMDemandFunction.PartitionFraction.XYPairs.Y= 0.19, 0.17, 0.17
                  [Leaf].Photosynthesis.FT.FTDaytime.XYPairs.X=  8, 18, 23, 40
                  [Leaf].Photosynthesis.FT.FTDaytime.XYPairs.Y 0, 1, 1, 0
                  [Leaf].Photosynthesis.FT.FTFrost.XYPairs.X= -5, -2, -1, 0, 1, 2, 2.1
                  [Leaf].Photosynthesis.FT.FTFrost.XYPairs.Y = 0, 0, 0, 0, 0, 0.9, 1
                  [Leaf].SenescenceRate.XYPairs.X=  -5,  -2,  0,    2,  2.1
                  [Leaf].SenescenceRate.XYPairs.Y = 0.7, 0.5, 0.2, 0.1, 0
                  [CoarseRoot].DMDemands.Structural.DMDemandFunction.PartitionFraction.XYPairs.X=0,2000,10000
                  [CoarseRoot].DMDemands.Structural.DMDemandFunction.PartitionFraction.XYPairs.Y=0.03,0.1,0.1
                  [FineRoot].DMDemands.Structural.DMDemandFunction.PartitionFraction.FixedValue = 0.35
                  [Leaf].SpecificLeafAreaFunction.SpecificLeafAreaPot.XYPairs.X= 0, 1, 2, 3, 4, 80
                  [Leaf].SpecificLeafAreaFunction.SpecificLeafAreaPot.XYPairs.Y= 0.018, 0.014, 0.011, 0.009, 0.008, 0.007
              Cultivar BrazilSubTropicalClone
                Command:
                  [Leaf].Photosynthesis.RUE.FixedValue = 1.57
                  [Leaf].ExtinctionCoefficient.KYoungTrees.FixedValue = 0.26
                  [Leaf].ExtinctionCoefficient.KMatureTrees.FixedValue = 0.55
                  [Stem].DMDemands.Structural.DMDemandFunction.PartitionFraction.XYPairs.X=0,2000,10000
                  [Stem].DMDemands.Structural.DMDemandFunction.PartitionFraction.XYPairs.Y=0.15, 0.30, 0.57
                  [Branch].DMDemands.Structural.DMDemandFunction.PartitionFraction.XYPairs.X=0,2000,10000
                  [Branch].DMDemands.Structural.DMDemandFunction.PartitionFraction.XYPairs.Y=0.09,0.09,0.09
                  [Leaf].DMDemands.Structural.DMDemandFunction.PartitionFraction.XYPairs.X=0,2000,10000
                  [Leaf].DMDemands.Structural.DMDemandFunction.PartitionFraction.XYPairs.Y= 0.20, 0.16, 0.15
                  [Leaf].Photosynthesis.FT.FTDaytime.XYPairs.X=  6, 17, 22, 38
                  [Leaf].Photosynthesis.FT.FTDaytime.XYPairs.Y 0, 1, 1, 0
                  [Leaf].Photosynthesis.FT.FTFrost.XYPairs.X= -5, -2, -1, 0, 1, 2, 2.1
                  [Leaf].Photosynthesis.FT.FTFrost.XYPairs.Y = 0.5, 1, 1, 1, 1, 1, 1
                  [Leaf].SenescenceRate.XYPairs.X=  -5,  -2,  0,    2,  2.1
                  [Leaf].SenescenceRate.XYPairs.Y = 0.7, 0.5, 0.2, 0.1, 0
                  [CoarseRoot].DMDemands.Structural.DMDemandFunction.PartitionFraction.XYPairs.X=0,2000,10000
                  [CoarseRoot].DMDemands.Structural.DMDemandFunction.PartitionFraction.XYPairs.Y=0.02,0.05,0.06
                  [FineRoot].DMDemands.Structural.DMDemandFunction.PartitionFraction.FixedValue = 0.24
                  [Leaf].SpecificLeafAreaFunction.SpecificLeafAreaPot.XYPairs.X= 0, 1, 2, 3, 4, 80
                  [Leaf].SpecificLeafAreaFunction.SpecificLeafAreaPot.XYPairs.Y= 0.015, 0.013, 0.009, 0.008, 0.007, 0.007
            CultivarFolder saligna
              Cultivar saligna
                Memo Genotype note
                  This genotype specification was originally planned to be for the species E. saligna, but we did not actually provide any specific parameters. As no parameter values were changed here, generic Pinus parameters were used where this genotype was specified in a simulation.
          Report: EventNames=[Clock].DoReport
            VariableNames:
              [Clock].Today
              //[TreeManagement].Script.CultivarName. as Cultivar
              [Pinus].Age
              [Pinus].Population*10000 as stemsperha
              [Pinus].AboveGround.Wt
              [Pinus].AboveGround.N
              [Pinus].BelowGround.Wt
              [Pinus].Leaf.Dead.Wt
              [Pinus].Leaf.Live.Wt
              [Pinus].Leaf.Live.NConc
              [Pinus].Leaf.Wt
              [Pinus].Branch.Live.Wt
              [Pinus].Branch.Dead.Wt
              [Pinus].Branch.Wt
              [Pinus].Leaf.Detached.Wt
              [Pinus].Stem.Live.Wt
              [Pinus].Total.N
              [Pinus].Leaf.Live.NConc
              [Pinus].Cone.Live.NConc
              [Pinus].Branch.Live.NConc
              [Pinus].Stem.Live.NConc
              [Pinus].CoarseRoot.Live.NConc
              [Pinus].FineRoot.Live.NConc
              [Pinus].Leaf.Live.N*10 as LiveFoliarN
              [Pinus].Leaf.N*10 as TotalFoliarN
              [Pinus].Leaf.CoverGreen
              [Pinus].Leaf.SpecificLeafArea
              [Pinus].Leaf.LAI
              [Pinus].LAI
              [Pinus].Leaf.Fn
              [Pinus].Leaf.Fw
              [Pinus].TotalLive.Wt
              ([Pinus].Leaf.Transpiration + [Soil].SoilWater.Es + [MicroClimate].PrecipitationInterception) as ET
              [Pinus].IndividualTreeStemWt
              [Pinus].IndividualTreeLiveWt
              [Pinus].Stem.DBH
              [Pinus].Stem.Ht
              [Pinus].RootShootRatio
              [Pinus].Stem.Vol
              [Pinus].Stem.MAI
              [Pinus].Stem.BA
              [Pinus].Stem.BarkThickness
              [Pinus].Stem.BarkWt
              [Pinus].Stem.BAub
              [Pinus].Stem.DBHub
              [Pinus].Stem.MAIub
              [Pinus].Stem.VolBark
              [Pinus].Stem.Volub
              [Pinus].Stem.WoodDensity
              [Pinus].Stem.BarkDensity
              [Pinus].Stem.WoodWt
              [Pinus].Stem.Wt
              [Pinus].Stem.Live.Wt
              [Pinus].FineRoot.Wt
              [Pinus].CoarseRoot.Wt
              [Pinus].Cone.Wt
              [Pinus].TotalWoodBark.Wt
              //(([Soil].SoilWater.SW[2])+([Soil].SoilWater.SW[3]))/2 as SW30
              //(([Soil].SoilWater.SW[2])+([Soil].SoilWater.SW[3]))/2 as SW30
              //(([Soil].SoilWater.SW[9])+([Soil].SoilWater.SW[10]))/2 as SW600
              sum ([SoilWater].PAWmm) as PAWmmTotal
              [Soil].SoilWater.SWmm[1] as SWmmD1
              [SoilWater].Evaporation[1]
              [SoilWater].Drainage[1]
              [SoilWater].Flux[1]
              [SoilWater].Flow[1]
              [SoilWater].Infiltration[1]
              [SoilWater].LateralFlow[1]
              [SoilWater].LateralOutflow
              [SoilWater].Runoff[1]
              [MicroClimate].PrecipitationInterception
              [Pinus].FineRoot.WaterUptake[1]
              [Soil].SoilWater.SW[1] as SWD1
              [Soil].SoilWater.SW[2] as SWD2
              [Soil].SoilWater.SW[3] as SWD3
              [Soil].SoilWater.SW[4] as SWD4
              //[Soil].SoilWater.SW[5] as SWD5
              //[Soil].SoilWater.SW[6] as SWD6
              //[Soil].SoilWater.SW[7] as SWD7
              //[Soil].SoilWater.SW[8] as SWD8
              sum([Soil].SoilWater.SWmm) as SWmmTotal
              //[SoilNitrogen].NO3ppm
              //[SoilNitrogen].NH4ppm
              //[SoilNitrogen].NO3.kgha
              //[Nutrient].NH4.kgha[1]
              //[Nutrient].NO3.kgha[1]
              ([Nutrient].NO3.kgha + [Nutrient].NH4.kgha) as MineralNkgpha
              sum ([Nutrient].NH4.kgha) as NH4Nkgpha
              sum ([Nutrient].NO3.kgha) as NO3Nkgpha
              (sum ([Nutrient].NH4.kgha)+ sum ([Nutrient].NO3.kgha)) as MineralNTotalkgpha
              //([SoilNitrogen].NO3.kgha[1]*1000000/14)/([Soil].SoilWater.SW[1]*1000000) as NO3mMD1
              //([SoilNitrogen].NO3.kgha[2]*1000000/14)/([Soil].SoilWater.SW[2]*1000000) as NO3mMD2
              //([SoilNitrogen].NO3.kgha[3]*1000000/14)/([Soil].SoilWater.SW[3]*1000000) as NO3mMD3
              //([SoilNitrogen].NH4.kgha[1]*1000000/14)/([Soil].SoilWater.SW[1]*1000000) as NH4mMD1
              //([SoilNitrogen].NH4.kgha[2]*1000000/14)/([Soil].SoilWater.SW[2]*1000000) as NH4mMD2
              //([SoilNitrogen].NH4.kgha[3]*1000000/14)/([Soil].SoilWater.SW[3]*1000000) as NH4mMD3
              [Irrigation].IrrigationApplied
              [Weather].Rain
          Report AnnualReport: EventNames=[Clock].EndOfYear
            VariableNames:
              [Clock].Today
              ([Nutrient].MineralisedN[1]+[Nutrient].MineralisedN[2]+[Nutrient].MineralisedN[3])*10 as NNMkg45cmAnnual
          Report HarvestReport: same as Replacements.HarvestReport
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