Simulations: Version=22
  DataStore
  Simulation RussetBurbank
    Weather: FileName=WeatherFiles\lincoln.met
    Clock: StartDate=2003-10-20; EndDate=2004-06-05
    Summary
    SoilArbitrator Soil Arbitrator
    Zone Field: Area=1; Slope=0
      Soil: SoilType=Sedementary; LocalName=Lincoln; Latitude=0; Longitude=0
        Water
          Thickness  BD   AirDry  LL15  DUL   SAT
          100        1.2  0.08    0.16  0.33  0.5
          200        1.2  0.16    0.16  0.33  0.5
          300        1.2  0.15    0.15  0.31  0.44
          300        1.2  0.13    0.13  0.27  0.46
          300        1.2  0.15    0.15  0.3   0.44
          300        1.2  0.15    0.15  0.3   0.44
          SoilCrop PotatoSoil: LL=[0.13, 0.13, 0.1, 0.15, 0.3, 0.3]; KL=[0.1, 0.06, 0.04, 0.01, 0, 0]; XF=[1, 1, 1, 1, 0, 0]
        SoilWater: SummerDate=1-Nov; SummerU=9; SummerCona=4.4; WinterDate=1-Apr; WinterU=9; WinterCona=4.4; DiffusConst=88; DiffusSlope=35.4; Salb=0.18; CN2Bare=0; CNRed=-9E-05; CNCov=0; slope=0; discharge_width=0; catchment_area=0; max_pond=0; residueinterception=0
          Thickness  SWCON  KLAT
          100        0.55   0
          200        0.55   0
          300        0.55   0
          300        0.55   0
          300        0.55   0
          300        0.55   0
        SoilNitrogen: fom_type=[default, manure, mucuna, lablab, shemp, stable]; fract_carb=[0.2, 0.3, 0.54, 0.57, 0.45, 0]; fract_cell=[0.7, 0.3, 0.37, 0.37, 0.47, 0.1]; fract_lign=[0.1, 0.4, 0.09, 0.06, 0.08, 0.9]
        SoilOrganicMatter: RootCN=30; RootWt=3000; SoilCN=11.5; EnrACoeff=7.4; EnrBCoeff=0.2; OCUnits=Total
          Thickness  OC    FBiom  FInert
          100        3.5   0.025  0.3
          200        2.5   0.025  0.4
          300        1.2   0.015  0.75
          300        1.03  0.01   0.9
          300        0.47  0.01   0.96
          300        0.47  0.01   0.96
        Analysis: Thickness=[100, 200, 300, 300, 300, 300]; PH=[6.6, 6.2, 5.7, 5.5, 5.5, 5.5]; PHUnits=Water; BoronUnits=HotWater
        InitialWater Initial water: PercentMethod=FilledFromTop; FractionFull=1
        Sample: NO3Units=kgha; NH4Units=kgha; SWUnits=Volumetric; OCUnits=Total; PHUnits=Water
          Thickness  NO3   NH4
          100        40    0.1
          200        30    0.1
          300        14    0.1
          300        14    0.1
          300        1.38  0.1
          300        1.38  0.1
        CERESSoilTemperature
      SoluteManager
      SurfaceOrganicMatter: PondActive=no; ReportAdditions=no; ReportRemovals=no; PoolName=Wheat; type=Wheat; mass=2000; standing_fraction=0; cnr=80; CriticalResidueWeight=2000; OptimumDecompTemp=20; MaxCumulativeEOS=20; CNRatioDecompCoeff=0.277; CNRatioDecompThreshold=25; TotalLeachRain=25; MinRainToLeach=10; CriticalMinimumOrganicC=0.004; DefaultCPRatio=0; DefaultStandingFraction=0; StandingExtinctCoeff=0.5; FractionFaecesAdded=0.5
        Pools:
          {PoolName=Wheat, ResidueType=Wheat, Mass=2000, CNRatio=80, StandingFraction=0}
        ResidueTypes: LoadFromResource=ResidueTypes
        TillageTypes TillageTypesList
      MicroClimate: a_interception=0; b_interception=1; c_interception=0; d_interception=0; soil_albedo=0.23; sun_angle=15; soil_heat_flux_fraction=0.4; night_interception_fraction=0.5; refheight=2; albedo=0.26; emissivity=0.96; RadIntTotal=0
      Irrigation
      Fertiliser
      Plant Potato: CropType=Potato
      Operations
        2003-10-20  [Fertiliser].Apply(100, Fertiliser.Types.UreaN, 0);
        2003-11-25  [Fertiliser].Apply(69, Fertiliser.Types.UreaN,0);
        2003-11-26  [Irrigation].Apply(15);
        2003-12-04  [Irrigation].Apply(50);
        2003-12-16  [Irrigation].Apply(15);
        2003-12-22  [Irrigation].Apply(50);
        2003-12-30  [Irrigation].Apply(50);
        2004-01-08  [Irrigation].Apply(50);
        2004-01-21  [Irrigation].Apply(50);
        2004-01-31  [Irrigation].Apply(50);
        2004-02-27  [Irrigation].Apply(25);
      Manager PotatoPlantAndHarvest
        PlantingDate = 2003-10-22
        CultivarName = RussetBurbank
        RowSpace = 280
        RowWidth = 770
        PlantingDepth = 120
        StemNumberPerSeedTuber = 2.2
        SetFinalLeafNumber = 40
        HarvestDate = 2004-05-01
```csharp
using System;
using Models.Core;
using Models.PMF;
using APSIM.Shared.Utilities;
using System.Xml.Serialization;
        
namespace Models
{
	[Serializable] 
	[System.Xml.Serialization.XmlInclude(typeof(Model))]
	public class Script : Model
	{
		[Link] Plant Potato;
		[Link] Clock Clock;
		[Link] Zone zone;
		[Link] Summary Summary;
		[Description("Planting Date")]
		public DateTime PlantingDate { get; set; }
		[Description("Cultivar")]
		public string CultivarName { get; set; }
		[Description("Spacing (mm) between plants within rows")]
		public double RowSpace { get; set; }
		[Description("Spacing (mm) between rows")]
		public double RowWidth { get; set; }
		[Description("Depth (mm) tubers are planted")]
		public double PlantingDepth { get; set; }
		[Description("Number of stems per seed piece")]
		public double StemNumberPerSeedTuber { get; set; }
		[Description("Final leaf number.  Leave at 0 if not known")]
		public double SetFinalLeafNumber { get; set; }
		[Description("HarvestDate Date")]
		public DateTime HarvestDate { get; set; }
		[XmlIgnore] public string FinalTag { get; set; }
		[XmlIgnore] public bool Harvested { get; set; }
		[XmlIgnore] public bool ReadyForHarvest { get; set; }
		
		[EventSubscribe("DoManagement")]
		private void OnDoManagement(object sender, EventArgs e)
		{
			double PlantPopulation = 1 / ((RowWidth / 1000) * (RowSpace / 1000));

			if (Clock.Today.Date == PlantingDate)
				Potato.Sow(population: PlantPopulation, cultivar: CultivarName, depth: PlantingDepth, rowSpacing: 150, budNumber: StemNumberPerSeedTuber);
			if (Clock.Today.Date == HarvestDate)
				Potato.Harvest();
			if (SetFinalLeafNumber > 0)
				zone.Set("Potato.Structure.FinalLeafNumber.FixedValue", SetFinalLeafNumber);
			if (SetFinalLeafNumber > 46)
				throw new Exception("The model will fail with leaf numbers > 46.  Reduce Final leaf number.");
		}
	}
}
```
      Manager ExtraVariables
```csharp
using System;
using Models.Core;
using System.Collections.Generic;
using System.Text;
using Models.Soils;
using Models.PMF;
using Models;
using System.Xml.Serialization;
using APSIM.Shared.Utilities;

namespace Models
{
	[Serializable] 
	public class Script : Model
	{
		[Link] Clock Clock;
		[Link] Soils.Soil Soil;
		[Link] Models.SurfaceOM.SurfaceOrganicMatter SOM;
		[Link] Weather Met;
		[Link] Fertiliser Fert;
		[Link] Irrigation Irrig;
		[Link] Plant Potato;
		[Link] Zone zone;
					
		[XmlIgnore] public bool InitialDay { get; set; }
		
		[XmlIgnore] public double AccumPlantN { get; set; }
		[XmlIgnore] public double AccumMineralisation { get; set; }
		[XmlIgnore] public double AccumDenit { get; set; }
		[XmlIgnore] public double AccumFert { get; set; }
		[XmlIgnore] public double AccumLeach { get; set; }
		[XmlIgnore] public double AccumDetach { get; set; }
		[XmlIgnore] public double DeltaSoilOMN { get; set; }
		[XmlIgnore] public double DeltaSurfaceOMN { get; set; }
		[XmlIgnore] public double DeltaSoilMineralN { get; set; }
		[XmlIgnore] public double SoilNitrogenContent { get; set; }
		
		[XmlIgnore] public double AccumEO { get; set; }
		[XmlIgnore] public double AccumEP { get; set; }
		[XmlIgnore] public double AccumES { get; set; }
		[XmlIgnore] public double AccumDrainage { get; set; }
		[XmlIgnore] public double AccumRunoff { get; set; }
		[XmlIgnore] public double AccumOutflowLat { get; set; }
		[XmlIgnore] public double AccumIrrigation { get; set; }
		[XmlIgnore] public double AccumRainfall { get; set; }
		[XmlIgnore] public double SoilWaterDeficit { get; set; }
		
		[XmlIgnore] public double AccumTtemerg { get; set; }
		
		[XmlIgnore] public double  InitialSoilOMN { get; set; }
		[XmlIgnore] public double  InitialSurfaceOMN { get; set; }
		[XmlIgnore] public double  InitialMineralN { get; set; }
		
		[XmlIgnore] public double SWC { get; set; }
		[XmlIgnore] public double DUL { get; set; }
		[XmlIgnore] public double OutFlowLat { get; set; }

		[XmlIgnore] public double FomN { get; set; }
		[XmlIgnore] public double BiomN { get; set; }
		[XmlIgnore] public double HumN { get; set; }
		[XmlIgnore] public double OrganicN { get; set; }
		[XmlIgnore] public double NO3N { get; set; }
		[XmlIgnore] public double NH4N { get; set; }
		[XmlIgnore] public double UreaN { get; set; }
		[XmlIgnore] public double MineralN { get; set; }
		[XmlIgnore] public double DltNMinRes { get; set; }
		[XmlIgnore] public double DltNMinTot { get; set; }
		
		[EventSubscribe("Commencing")]
		private void OnSimulationCommencing(object sender, EventArgs e)
		{
			InitialDay = true;
		}
		
		[EventSubscribe("DoManagement")]
		private void OnDoManagement(object sender, EventArgs e)
		{
			//!!!!!! Nitrogen balance components !!!!!!
			//!!!!!!^^^^^^^^^^^^^^^^^^^^^^^^^^^^^!!!!!!
			FomN = MathUtilities.Sum(Soil.SoilNitrogen.FOMN);
			HumN = MathUtilities.Sum(Soil.SoilNitrogen.HumicN);
			BiomN = MathUtilities.Sum(Soil.SoilNitrogen.MicrobialN);
			OrganicN = FomN + HumN + BiomN;
			NO3N = MathUtilities.Sum(Soil.NO3N);
			NH4N = MathUtilities.Sum(Soil.NH4N);
			UreaN = MathUtilities.Sum(Soil.SoilNitrogen.urea);
			MineralN = NO3N + NH4N + UreaN; 
			DltNMinRes = MathUtilities.Sum(Soil.SoilNitrogen.dlt_n_min_res);
			DltNMinTot = MathUtilities.Sum(Soil.SoilNitrogen.MineralisedN);
			int layers = Soil.Thickness.Length;
			if (InitialDay == true)
			{
				InitialSurfaceOMN = SOM.N;
				InitialSoilOMN = OrganicN;
				InitialMineralN = MineralN;
				InitialDay = false;
			}
			AccumFert += Fert.NitrogenApplied;
			DeltaSurfaceOMN = SOM.N - InitialSurfaceOMN;
			AccumLeach = AccumLeach - Soil.SoilWater.LeachNH4 - Soil.SoilWater.LeachNO3 - Soil.SoilWater.LeachUrea; //Fails
			AccumMineralisation += MathUtilities.Sum(Soil.SoilNitrogen.MineralisedN);
			AccumDenit -= MathUtilities.Sum(Soil.SoilNitrogen.Denitrification);
			AccumPlantN -= (double)zone.Get("Potato.Root.NUptake");
			DeltaSoilOMN = OrganicN - InitialSoilOMN;
			DeltaSoilMineralN = MineralN - InitialMineralN;
			SoilNitrogenContent = MineralN;
			
			//!!!!!! Water balance components !!!!!!
			//!!!!!!^^^^^^^^^^^^^^^^^^^^^^^^^^!!!!!!

			AccumIrrigation += Irrig.IrrigationApplied;
			AccumRainfall += Met.Rain;
			AccumEP -= (double)zone.Get("Potato.Leaf.Transpiration");
			SoilWaterDeficit = (SWC - DUL);
			double OutFlowLat = MathUtilities.Sum(Soil.SoilWater.outflow_lat);
			AccumOutflowLat -= OutFlowLat;
			
			//!!!!!! Thermal time calculation !!!!!!
			//!!!!!! ^^^^^^^^^^^^^^^^^^^^^^^^ !!!!!!
			if (Potato.Phenology.Stage >= 3)
				AccumTtemerg += Potato.Phenology.ThermalTime.Value();
		}
		
		[EventSubscribe("DoManagementCalculations")]
		private void OnDoManagementCalculations(object sender, EventArgs e)
		{
			FomN = MathUtilities.Sum(Soil.SoilNitrogen.FOMN);
			HumN = MathUtilities.Sum(Soil.SoilNitrogen.HumicN);
			BiomN = MathUtilities.Sum(Soil.SoilNitrogen.MicrobialN);
			
			
			AccumEO -= Soil.SoilWater.Eo;
			AccumES -= Soil.SoilWater.Es; 
			AccumDrainage -= Soil.SoilWater.Drainage;
			AccumRunoff -= Soil.SoilWater.Runoff;
			SWC = MathUtilities.Sum(Soil.SoilWater.SWmm);
			DUL = MathUtilities.Sum(Soil.DULmm);
		}
	}
}
```
      Report: EventNames=[Clock].DoReport
        VariableNames:
          [Clock].Today
          [ExtraVariables].Script.AccumDenit
          [ExtraVariables].Script.AccumDetach
          [ExtraVariables].Script.AccumDrainage
          [ExtraVariables].Script.AccumEO
          [ExtraVariables].Script.AccumEP
          [ExtraVariables].Script.AccumES
          [ExtraVariables].Script.AccumFert
          [ExtraVariables].Script.AccumIrrigation
          [ExtraVariables].Script.AccumLeach
          [ExtraVariables].Script.AccumMineralisation
          [ExtraVariables].Script.AccumOutflowLat
          [ExtraVariables].Script.AccumPlantN
          [ExtraVariables].Script.AccumRainfall
          [ExtraVariables].Script.AccumRunoff
          [ExtraVariables].Script.AccumTtemerg
          [ExtraVariables].Script.BiomN
          [ExtraVariables].Script.DeltaSoilMineralN
          [ExtraVariables].Script.DeltaSoilOMN
          [ExtraVariables].Script.DeltaSurfaceOMN
          [ExtraVariables].Script.DltNMinRes
          [ExtraVariables].Script.DltNMinTot
          [ExtraVariables].Script.DUL
          [ExtraVariables].Script.FomN
          [ExtraVariables].Script.HumN
          [ExtraVariables].Script.OutFlowLat
          [ExtraVariables].Script.SoilNitrogenContent
          [ExtraVariables].Script.SoilWaterDeficit
          [ExtraVariables].Script.SWC
          [MicroClimate].net_radn
          [MicroClimate].peta
          [MicroClimate].petr
          [Soil].NO3N
          [Soil].SoilWater.Drainage
          [Soil].SoilWater.Eo
          [Soil].SoilWater.Es
          [Soil].SoilWater.pond
          [Soil].SoilWater.Runoff
          [Soil].SoilWater.SWmm
          [Potato].Arbitrator.DM.Allocated
          [Potato].Arbitrator.DM.TotalPlantDemand
          [Potato].Arbitrator.DM.NutrientLimitation
          [Potato].Arbitrator.DM.SinkLimitation
          [Potato].Arbitrator.DM.TotalFixationSupply
          [Potato].Arbitrator.N.TotalPlantDemand
          [Potato].Arbitrator.NH4NSupply
          [Potato].Arbitrator.NO3NSupply
          [Potato].Arbitrator.N.TotalPlantSupply
          [Potato].Arbitrator.N.Allocated
          [Potato].HarvestRule.Script.FinalTag
          [Potato].Leaf.AppearedCohortNo
          [Potato].Leaf.CohortParameters.MaximumNConc.Value()
          [Potato].Leaf.CohortParameters.MinimumNConc.Value()
          [Potato].Leaf.CoverDead
          [Potato].Leaf.CoverGreen
          [Potato].Leaf.CoverTotal
          [Potato].Leaf.Dead.N
          [Potato].Leaf.Dead.NConc
          [Potato].Leaf.Dead.Wt
          [Potato].Leaf.DeadCohortNo
          [Potato].Leaf.ExpandedCohortNo
          [Potato].Leaf.ExpandingCohortNo
          [Potato].Leaf.Fn
          [Potato].Leaf.Fw
          [Potato].Leaf.LAI
          [Potato].Leaf.LAIDead
          [Potato].Leaf.Live.N
          [Potato].Leaf.Live.NConc
          [Potato].Leaf.Live.Wt
          [Potato].Leaf.Photosynthesis.FT.Value()
          [Potato].Leaf.Photosynthesis.FVPD.Value()
          [Potato].Leaf.PlantAppearedGreenLeafNo
          [Potato].Leaf.SenescingCohortNo
          [Potato].Leaf.SpecificArea
          [Potato].Leaf.Transpiration
          [Potato].Leaf.PotentialEP
          [Potato].Phenology.CurrentPhaseName
          [Potato].Phenology.Stage
          [Potato].Phenology.Stage
          [Potato].Root.Dead.N
          [Potato].Root.Dead.NConc
          [Potato].Root.Dead.Wt
          [Potato].Root.Depth
          [Potato].Root.Live.N
          [Potato].Root.Live.NConc
          [Potato].Root.Live.Wt
          [Potato].Root.MaximumNConc.Value()
          [Potato].Root.MinimumNConc.Value()
          [Potato].Root.NSupplyUptake
          [Potato].Root.NUptake
          [Potato].Root.WaterSupply
          [Potato].Root.WaterUptake
          [Potato].Stem.Dead.N
          [Potato].Stem.Dead.NConc
          [Potato].Stem.Dead.Wt
          [Potato].Stem.Live.N
          [Potato].Stem.Live.NConc
          [Potato].Stem.Live.StorageWt
          [Potato].Stem.Live.StructuralWt
          [Potato].Stem.Live.Wt
          [Potato].Stem.MaximumNConc.Value()
          [Potato].Stem.MinimumNConc.Value()
          [Potato].Structure.Height
          [Potato].Structure.LeafTipsAppeared
          [Potato].Structure.FinalLeafNumber.Value()
          [Potato].Structure.PlantTotalNodeNo
          [Potato].Structure.PrimaryBudTotalNodeNo
          [Potato].Structure.TotalStemPopn
          [Potato].AboveGround.N
          [Potato].AboveGround.Wt
          [Potato].BelowGround.N
          [Potato].BelowGround.Wt
          [Potato].Total.N
          [Potato].Total.Wt
          [Potato].TotalDead.N
          [Potato].TotalDead.Wt
          [Potato].TotalLive.N
          [Potato].TotalLive.Wt
          [Potato].Tuber.Dead.N
          [Potato].Tuber.Dead.NConc
          [Potato].Tuber.Dead.Wt
          [Potato].Tuber.LiveFWt.DryMatterContent.Value()
          [Potato].Tuber.Live.N
          [Potato].Tuber.Live.NConc
          [Potato].Tuber.Live.Wt
          [Potato].Tuber.LiveFWt
          [Potato].Tuber.MaximumNConc.Value()
          [Potato].Tuber.MinimumNConc.Value()
          [Potato].Leaf.InitialisedCohortNo
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