Simulations: Version=80
  DataStore
  Simulation
    Clock: Start=2014-02-01; End=2016-11-30
    Weather: FileName=WeatherFiles\lincoln.met
    Summary summaryfile
    SoilArbitrator Soil Arbitrator
    Zone Field: Area=1; Slope=0; AspectAngle=0; Altitude=50
      Folder Management
        Operations Sowing
          2014-03-20  [RedClover].Sow(population: 500, cultivar: "Colenso", depth: 5, rowSpacing: 150)
        Operations IrrigationSchedule
          2014-10-31  [Irrigation].Apply(amount: 7, efficiency: 0.8)
          2014-11-03  [Irrigation].Apply(amount: 7, efficiency: 0.8)
          2014-11-05  [Irrigation].Apply(amount: 8, efficiency: 0.8)
          2014-11-07  [Irrigation].Apply(amount: 8, efficiency: 0.8)
          2014-11-10  [Irrigation].Apply(amount: 7, efficiency: 0.8)
          2014-11-11  [Irrigation].Apply(amount: 7, efficiency: 0.8)
          2014-11-12  [Irrigation].Apply(amount: 8, efficiency: 0.8)
          2014-11-17  [Irrigation].Apply(amount: 9, efficiency: 0.8)
          2014-11-18  [Irrigation].Apply(amount: 7, efficiency: 0.8)
          2014-11-19  [Irrigation].Apply(amount: 7, efficiency: 0.8)
          2014-11-24  [Irrigation].Apply(amount: 8, efficiency: 0.8)
          2014-11-25  [Irrigation].Apply(amount: 9, efficiency: 0.8)
          2014-11-27  [Irrigation].Apply(amount: 10, efficiency: 0.8)
          2014-12-01  [Irrigation].Apply(amount: 8, efficiency: 0.8)
          2014-12-02  [Irrigation].Apply(amount: 8, efficiency: 0.8)
          2014-12-04  [Irrigation].Apply(amount: 7, efficiency: 0.8)
          2014-12-08  [Irrigation].Apply(amount: 7, efficiency: 0.8)
          2014-12-09  [Irrigation].Apply(amount: 7, efficiency: 0.8)
          2014-12-12  [Irrigation].Apply(amount: 8, efficiency: 0.8)
          2014-12-15  [Irrigation].Apply(amount: 10, efficiency: 0.8)
          2014-12-17  [Irrigation].Apply(amount: 10, efficiency: 0.8)
          2014-12-19  [Irrigation].Apply(amount: 7, efficiency: 0.8)
          2014-12-20  [Irrigation].Apply(amount: 7, efficiency: 0.8)
          2014-12-21  [Irrigation].Apply(amount: 8, efficiency: 0.8)
          2014-12-22  [Irrigation].Apply(amount: 10, efficiency: 0.8)
          2014-12-25  [Irrigation].Apply(amount: 8, efficiency: 0.8)
          2014-12-26  [Irrigation].Apply(amount: 8, efficiency: 0.8)
          2014-12-27  [Irrigation].Apply(amount: 7, efficiency: 0.8)
          2014-12-28  [Irrigation].Apply(amount: 10, efficiency: 0.8)
          2014-12-29  [Irrigation].Apply(amount: 8, efficiency: 0.8)
          2014-12-30  [Irrigation].Apply(amount: 8, efficiency: 0.8)
          2015-01-02  [Irrigation].Apply(amount: 7, efficiency: 0.8)
          2015-01-05  [Irrigation].Apply(amount: 10, efficiency: 0.8)
          2015-01-08  [Irrigation].Apply(amount: 8, efficiency: 0.8)
          2015-01-09  [Irrigation].Apply(amount: 9, efficiency: 0.8)
          2015-01-12  [Irrigation].Apply(amount: 7, efficiency: 0.8)
          2015-01-13  [Irrigation].Apply(amount: 7, efficiency: 0.8)
          2015-01-16  [Irrigation].Apply(amount: 8, efficiency: 0.8)
          2015-01-19  [Irrigation].Apply(amount: 7, efficiency: 0.8)
          2015-01-20  [Irrigation].Apply(amount: 7, efficiency: 0.8)
          2015-01-21  [Irrigation].Apply(amount: 8, efficiency: 0.8)
          2015-01-26  [Irrigation].Apply(amount: 10, efficiency: 0.8)
          2015-01-27  [Irrigation].Apply(amount: 10, efficiency: 0.8)
          2015-01-29  [Irrigation].Apply(amount: 8, efficiency: 0.8)
          2015-02-02  [Irrigation].Apply(amount: 10, efficiency: 0.8)
          2015-02-04  [Irrigation].Apply(amount: 8, efficiency: 0.8)
          2015-02-05  [Irrigation].Apply(amount: 7, efficiency: 0.8)
          2015-02-09  [Irrigation].Apply(amount: 8, efficiency: 0.8)
          2015-02-11  [Irrigation].Apply(amount: 7, efficiency: 0.8)
          2015-02-12  [Irrigation].Apply(amount: 10, efficiency: 0.8)
          2015-02-16  [Irrigation].Apply(amount: 10, efficiency: 0.8)
          2015-02-17  [Irrigation].Apply(amount: 10, efficiency: 0.8)
          2015-02-18  [Irrigation].Apply(amount: 8, efficiency: 0.8)
          2015-02-24  [Irrigation].Apply(amount: 10, efficiency: 0.8)
          2015-02-26  [Irrigation].Apply(amount: 7, efficiency: 0.8)
          2015-02-27  [Irrigation].Apply(amount: 8, efficiency: 0.8)
          2015-03-02  [Irrigation].Apply(amount: 7, efficiency: 0.8)
          2015-03-03  [Irrigation].Apply(amount: 7, efficiency: 0.8)
          2015-03-05  [Irrigation].Apply(amount: 8, efficiency: 0.8)
          2015-03-10  [Irrigation].Apply(amount: 8, efficiency: 0.8)
          2015-03-12  [Irrigation].Apply(amount: 9, efficiency: 0.8)
          2015-03-13  [Irrigation].Apply(amount: 7, efficiency: 0.8)
          2015-03-16  [Irrigation].Apply(amount: 10, efficiency: 0.8)
          2015-03-19  [Irrigation].Apply(amount: 9, efficiency: 0.8)
          2015-03-20  [Irrigation].Apply(amount: 8, efficiency: 0.8)
          2015-03-23  [Irrigation].Apply(amount: 9, efficiency: 0.8)
          2015-03-24  [Irrigation].Apply(amount: 7, efficiency: 0.8)
          2015-03-26  [Irrigation].Apply(amount: 10, efficiency: 0.8)
          2015-03-30  [Irrigation].Apply(amount: 7, efficiency: 0.8)
          2015-04-02  [Irrigation].Apply(amount: 10, efficiency: 0.8)
          2015-04-03  [Irrigation].Apply(amount: 8, efficiency: 0.8)
          2015-04-06  [Irrigation].Apply(amount: 7, efficiency: 0.8)
          2015-04-08  [Irrigation].Apply(amount: 10, efficiency: 0.8)
          2015-04-17  [Irrigation].Apply(amount: 10, efficiency: 0.8)
          2015-05-20  [Irrigation].Apply(amount: 10, efficiency: 0.8)
          2015-06-09  [Irrigation].Apply(amount: 10, efficiency: 0.8)
          2015-09-09  [Irrigation].Apply(amount: 10, efficiency: 0.8)
          2015-09-30  [Irrigation].Apply(amount: 10, efficiency: 0.8)
          2015-10-02  [Irrigation].Apply(amount: 8, efficiency: 0.8)
          2015-10-06  [Irrigation].Apply(amount: 10, efficiency: 0.8)
          2015-10-09  [Irrigation].Apply(amount: 10, efficiency: 0.8)
          2015-10-12  [Irrigation].Apply(amount: 8, efficiency: 0.8)
          2015-10-13  [Irrigation].Apply(amount: 7, efficiency: 0.8)
          2015-10-16  [Irrigation].Apply(amount: 10, efficiency: 0.8)
          2015-10-20  [Irrigation].Apply(amount: 10, efficiency: 0.8)
          2015-10-21  [Irrigation].Apply(amount: 8, efficiency: 0.8)
          2015-10-23  [Irrigation].Apply(amount: 7, efficiency: 0.8)
          2015-10-26  [Irrigation].Apply(amount: 7, efficiency: 0.8)
          2015-10-27  [Irrigation].Apply(amount: 9, efficiency: 0.8)
          2015-11-02  [Irrigation].Apply(amount: 10, efficiency: 0.8)
          2015-11-03  [Irrigation].Apply(amount: 8, efficiency: 0.8)
          2015-11-04  [Irrigation].Apply(amount: 9, efficiency: 0.8)
          2015-11-06  [Irrigation].Apply(amount: 9, efficiency: 0.8)
          2015-11-09  [Irrigation].Apply(amount: 10, efficiency: 0.8)
          2015-11-11  [Irrigation].Apply(amount: 7, efficiency: 0.8)
          2015-11-16  [Irrigation].Apply(amount: 10, efficiency: 0.8)
          2015-11-18  [Irrigation].Apply(amount: 9, efficiency: 0.8)
          2015-11-20  [Irrigation].Apply(amount: 7, efficiency: 0.8)
          2015-11-23  [Irrigation].Apply(amount: 10, efficiency: 0.8)
          2015-11-24  [Irrigation].Apply(amount: 8, efficiency: 0.8)
          2015-11-25  [Irrigation].Apply(amount: 7, efficiency: 0.8)
          2015-11-27  [Irrigation].Apply(amount: 9, efficiency: 0.8)
          2015-11-30  [Irrigation].Apply(amount: 7, efficiency: 0.8)
          2015-12-01  [Irrigation].Apply(amount: 7, efficiency: 0.8)
          2015-12-04  [Irrigation].Apply(amount: 9, efficiency: 0.8)
          2015-12-07  [Irrigation].Apply(amount: 10, efficiency: 0.8)
          2015-12-09  [Irrigation].Apply(amount: 9, efficiency: 0.8)
          2015-12-10  [Irrigation].Apply(amount: 9, efficiency: 0.8)
          2015-12-22  [Irrigation].Apply(amount: 8, efficiency: 0.8)
          2015-12-24  [Irrigation].Apply(amount: 9, efficiency: 0.8)
          2015-12-26  [Irrigation].Apply(amount: 8, efficiency: 0.8)
          2015-12-29  [Irrigation].Apply(amount: 7, efficiency: 0.8)
          2015-12-31  [Irrigation].Apply(amount: 7, efficiency: 0.8)
          2016-01-01  [Irrigation].Apply(amount: 10, efficiency: 0.8)
          2016-01-07  [Irrigation].Apply(amount: 10, efficiency: 0.8)
          2016-01-09  [Irrigation].Apply(amount: 7, efficiency: 0.8)
          2016-01-11  [Irrigation].Apply(amount: 7, efficiency: 0.8)
          2016-01-12  [Irrigation].Apply(amount: 7, efficiency: 0.8)
          2016-01-13  [Irrigation].Apply(amount: 9, efficiency: 0.8)
          2016-01-15  [Irrigation].Apply(amount: 10, efficiency: 0.8)
          2016-01-21  [Irrigation].Apply(amount: 7, efficiency: 0.8)
          2016-01-25  [Irrigation].Apply(amount: 8, efficiency: 0.8)
          2016-01-30  [Irrigation].Apply(amount: 7, efficiency: 0.8)
          2016-02-02  [Irrigation].Apply(amount: 10, efficiency: 0.8)
          2016-02-03  [Irrigation].Apply(amount: 10, efficiency: 0.8)
          2016-02-05  [Irrigation].Apply(amount: 9, efficiency: 0.8)
          2016-02-08  [Irrigation].Apply(amount: 10, efficiency: 0.8)
          2016-02-11  [Irrigation].Apply(amount: 10, efficiency: 0.8)
          2016-02-12  [Irrigation].Apply(amount: 7, efficiency: 0.8)
          2016-02-15  [Irrigation].Apply(amount: 8, efficiency: 0.8)
          2016-02-16  [Irrigation].Apply(amount: 8, efficiency: 0.8)
          2016-02-22  [Irrigation].Apply(amount: 7, efficiency: 0.8)
          2016-02-23  [Irrigation].Apply(amount: 7, efficiency: 0.8)
          2016-02-25  [Irrigation].Apply(amount: 7, efficiency: 0.8)
          2016-02-26  [Irrigation].Apply(amount: 7, efficiency: 0.8)
          2016-03-01  [Irrigation].Apply(amount: 7, efficiency: 0.8)
          2016-03-02  [Irrigation].Apply(amount: 8, efficiency: 0.8)
          2016-03-04  [Irrigation].Apply(amount: 10, efficiency: 0.8)
          2016-03-07  [Irrigation].Apply(amount: 9, efficiency: 0.8)
          2016-03-08  [Irrigation].Apply(amount: 4, efficiency: 0.8)
          2016-03-10  [Irrigation].Apply(amount: 8, efficiency: 0.8)
          2016-03-14  [Irrigation].Apply(amount: 8, efficiency: 0.8)
          2016-03-15  [Irrigation].Apply(amount: 10, efficiency: 0.8)
          2016-03-18  [Irrigation].Apply(amount: 9, efficiency: 0.8)
          2016-03-21  [Irrigation].Apply(amount: 10, efficiency: 0.8)
          2016-03-22  [Irrigation].Apply(amount: 9, efficiency: 0.8)
          2016-03-23  [Irrigation].Apply(amount: 9, efficiency: 0.8)
          2016-03-28  [Irrigation].Apply(amount: 8, efficiency: 0.8)
          2016-04-02  [Irrigation].Apply(amount: 10, efficiency: 0.8)
          2016-04-08  [Irrigation].Apply(amount: 10, efficiency: 0.8)
          2016-05-04  [Irrigation].Apply(amount: 10, efficiency: 0.8)
          2016-08-31  [Irrigation].Apply(amount: 10, efficiency: 0.8)
          2016-09-30  [Irrigation].Apply(amount: 7, efficiency: 0.8)
          2016-10-01  [Irrigation].Apply(amount: 8, efficiency: 0.8)
          2016-10-05  [Irrigation].Apply(amount: 10, efficiency: 0.8)
          2016-10-12  [Irrigation].Apply(amount: 10, efficiency: 0.8)
          2016-10-18  [Irrigation].Apply(amount: 10, efficiency: 0.8)
          2016-10-19  [Irrigation].Apply(amount: 8, efficiency: 0.8)
          2016-10-27  [Irrigation].Apply(amount: 10, efficiency: 0.8)
          2016-10-31  [Irrigation].Apply(amount: 9, efficiency: 0.8)
          2016-11-01  [Irrigation].Apply(amount: 8, efficiency: 0.8)
          2016-11-03  [Irrigation].Apply(amount: 8, efficiency: 0.8)
          2016-11-08  [Irrigation].Apply(amount: 7, efficiency: 0.8)
          2016-11-10  [Irrigation].Apply(amount: 8, efficiency: 0.8)
          2016-11-11  [Irrigation].Apply(amount: 9, efficiency: 0.8)
          2016-11-14  [Irrigation].Apply(amount: 7, efficiency: 0.8)
          2016-11-21  [Irrigation].Apply(amount: 7, efficiency: 0.8)
          2016-11-22  [Irrigation].Apply(amount: 8, efficiency: 0.8)
          2016-11-23  [Irrigation].Apply(amount: 7, efficiency: 0.8)
          2016-11-24  [Irrigation].Apply(amount: 7, efficiency: 0.8)
          2016-11-28  [Irrigation].Apply(amount: 8, efficiency: 0.8)
          2016-11-29  [Irrigation].Apply(amount: 9, efficiency: 0.8)
        Operations NRate
        Operations DefoliationSchedule
          2014-10-23  [DefoliationManager].Script.Defoliate(defoliationType: "Cut", amountDM: 40, amountType: "ResidualDM", duration: 1)
          2014-11-25  [DefoliationManager].Script.Defoliate(defoliationType: "Cut", amountDM: 40, amountType: "ResidualDM", duration: 1)
          2014-12-30  [DefoliationManager].Script.Defoliate(defoliationType: "Cut", amountDM: 40, amountType: "ResidualDM", duration: 1)
          2015-02-04  [DefoliationManager].Script.Defoliate(defoliationType: "Cut", amountDM: 40, amountType: "ResidualDM", duration: 1)
          2015-03-10  [DefoliationManager].Script.Defoliate(defoliationType: "Cut", amountDM: 40, amountType: "ResidualDM", duration: 1)
          2015-04-16  [DefoliationManager].Script.Defoliate(defoliationType: "Cut", amountDM: 40, amountType: "ResidualDM", duration: 1)
          2015-06-09  [DefoliationManager].Script.Defoliate(defoliationType: "Cut", amountDM: 40, amountType: "ResidualDM", duration: 1)
          2015-10-06  [DefoliationManager].Script.Defoliate(defoliationType: "Cut", amountDM: 40, amountType: "ResidualDM", duration: 1)
          2015-11-16  [DefoliationManager].Script.Defoliate(defoliationType: "Cut", amountDM: 40, amountType: "ResidualDM", duration: 1)
          2015-12-16  [DefoliationManager].Script.Defoliate(defoliationType: "Cut", amountDM: 40, amountType: "ResidualDM", duration: 1)
          2016-01-25  [DefoliationManager].Script.Defoliate(defoliationType: "Cut", amountDM: 40, amountType: "ResidualDM", duration: 1)
          2016-02-24  [DefoliationManager].Script.Defoliate(defoliationType: "Cut", amountDM: 40, amountType: "ResidualDM", duration: 1)
          2016-04-09  [DefoliationManager].Script.Defoliate(defoliationType: "Cut", amountDM: 40, amountType: "ResidualDM", duration: 1)
          2016-05-24  [DefoliationManager].Script.Defoliate(defoliationType: "Cut", amountDM: 40, amountType: "ResidualDM", duration: 1)
          2016-10-03  [DefoliationManager].Script.Defoliate(defoliationType: "Cut", amountDM: 40, amountType: "ResidualDM", duration: 1)
          2016-11-11  [DefoliationManager].Script.Defoliate(defoliationType: "Cut", amountDM: 40, amountType: "ResidualDM", duration: 1)
        Manager DefoliationManager
          AutomaticManagementIsEnabled = False
          DefoliationRotationStartDate = 2000-01-15
          DefoliationRotationEndDate = 2100-12-31
          DefoliateType = Graze
          DefoliationTriggerType = FixedInterval
          IntervalBetweenDefoliations = 21
          TargetStandingBiomass = 200
          DurationOfEachDefoliation = 1
          RemoveAmountType = DMToRemove
          AmountForEachDefoliation = 500
          RemoveAllBiomassIsEnabled = True
          DMRemoveType = UserDefinedFraction
          FractionDMToRemove = 1
          NRemoveType = UserDefinedFraction
          FractionNToRemove = 1
          ReturnType = AsResidue
          NDungType = DefineCNratio
          ProportionN2Dung = 0.4
          CNRatioDung = 20
          UrineDepth = 250
```csharp
// Performs defoliations, or removes biomass, from any existing plant (PMF and/or AgPasture) based on a set of given rules.  
// Defoliations can be triggered automatically by this manager or be called from another Script or a Schedule model.
// Developed by RCichota, last updated in 31/Mar/2019

namespace Models
{
    using System;
    using System.Xml.Serialization;
    using System.Collections.Generic;
    using APSIM.Shared.Utilities;
    using Models.Core;
    using Models.Soils;
    using Models.PMF;
    using Models.Interfaces;
    using Models.PMF.Interfaces;

    [Serializable]
    public class Script : Model
    {
        //> Links to other Apsim models
        [Link] private Clock clock;
        [Link] private Zone myZone;
        [Link] private Soil mySoil;
        [Link(ByName = true)] private ISolute Urea;
        [Link] private ISummary mySummary;
        //Auxiliary 'links'
        private List<Plant> PMFSpecies = new List<Plant>();
        private List<AgPasture.PastureSpecies> AgPSpecies = new List<AgPasture.PastureSpecies>();

        //> Events raised by this manager
        public event BiomassRemovedDelegate BiomassRemoved;

        //> User inputs from properties tab
        [Separator("Generic defoliation management - removes biomass from PMF and AgPasture species, plus residue management")]
        [Description("Allow this manager to control defoliations? ")]
        public bool AutomaticManagementIsEnabled { get; set; }
        [Description("Date to start the defoliation management (dd/mm/yyyy): ")]
        public DateTime DefoliationRotationStartDate { get; set; }
        [Description("Date to end the defoliation management (dd/mm/yyyy): ")]
        public DateTime DefoliationRotationEndDate { get; set; }

        [Separator("Parameters defining how the defoliation is managed")]
        [Description("What type of defoliation should be triggered? ")]
        public DefoliationTypes DefoliateType { get; set; }
        [Description("How the defoliations should be triggered? ")]
        public DefoliationTriggerTypes DefoliationTriggerType { get; set; }
        [Description("  Minimum number of days between defoliations, used if trigger is an interval: ")]
        public int IntervalBetweenDefoliations { get; set; }
        [Description("  Minimum standing biomass to start defoliations, used if trigger is DM target(g/m2): ")]
        public int TargetStandingBiomass { get; set; }
        [Description("Duration of each defoliation event (days): ")]
        public int DurationOfEachDefoliation { get; set; }
        [Description("Which amount is being defined? ")]
        public DefoliateAmountTypes RemoveAmountType { get; set; }
        [Description("DM amount to use (g/m2): ")]
        public double AmountForEachDefoliation { get; set; }
        [Description("For PMF species, allow all biomass to be removed? ")]
        public bool RemoveAllBiomassIsEnabled { get; set; }

        [Separator("Parameters defining the management of the defoliated biomass")]
        [Description("How much of the DM defoliated is to be removed from the field? ")]
        public DMRemovalTypes DMRemoveType { get; set; }
        [Description("  Fraction of DM to remove off field, if using UserDefinedFraction (0-1): ")]
        public double FractionDMToRemove { get; set; }
        [Description("How much of the N defoliated is to be removed from the field? ")]
        public NRemovalTypes NRemoveType { get; set; }
        [Description("  Fraction of N to remove off field, if using UserDefinedFraction (0-1): ")]
        public double FractionNToRemove { get; set; }
        [Description("How the non-removed material is returned to the field? ")]
        public ReturnAsTypes ReturnType { get; set; }

        [Separator("Parameters for partitioning non-removed N into urine and dung")]
        [Description("How the partition of N to dung and urine is defined? ")]
        public DungNContentTypes NDungType { get; set; }
        [Description("  Proportion of N returned in dung, if using DefineProportion (0-1): ")]
        public double ProportionN2Dung { get; set; }
        [Description("  The C:N of dung, if using DefineCNratio (typically around 20): ")]
        public double CNRatioDung { get; set; }
        [Description("Soil depth down to which urine should be applied (mm): ")]
        public double UrineDepth { get; set; }

        //> Outputs from this manager
        [XmlIgnore][Units("g/m2")] // Pasture DM defoliated (removed from plants) today
        public double DefoliatedWt{ get; set; }
        [XmlIgnore][Units("g/m2")] // N in the pasture material defoliated today
        public double DefoliatedN{ get; set; }
        [XmlIgnore][Units("g/m2")] // Pasture DM harvested (removed from plants minus direct residue) today
        public double HarvestedWt{ get; set; }
        [XmlIgnore][Units("g/m2")] // N in the pasture material harvested today
        public double HarvestedN{ get; set; }
        [XmlIgnore][Units("g/m2")] // Pasture DM actually removed from the field
        public double RemovedWt{ get; set; }
        [XmlIgnore][Units("g/m2")] // N in the pasture material removed from the field
        public double RemovedN{ get; set; }
        [XmlIgnore][Units("g/m2")] // Pasture DM returned by this manager to the field
        public double ReturnedWt{ get; set; }
        [XmlIgnore][Units("g/m2")] // N in the pasture material returned by this manager to the field
        public double ReturnedN{ get; set; }
        [XmlIgnore][Units("g/m2")] // Non-removed N returned as dung (to SurfaceOM)
        public double NReturnedInDung{ get; set; }
        [XmlIgnore][Units("g/m2")] // Non-removed N returned as urine (soil urea)
        public double NReturnedInUrine{ get; set; }
        [XmlIgnore][Units("days")] // Number of days since the end of last defoliation event
        public int DaysSinceLastDefoliation{ get; set; }
        [XmlIgnore][Units("g/m2")] // Total standing aboveground DM before a defoliation
        public double PreHarvestDM{ get; set; }
        [XmlIgnore][Units("g/m2")] // Total standing aboveground DM after a defoliation
        public double PostHarvestDM{ get; set; }
        [XmlIgnore][Units("g/m2")] // Total pasture DM harvested over a complete defoliation event
        public double RotationHarvestedDM{ get; set; }

        //> Internal variables
        private string baseDefoliationType;              // type of defoliation, as set in UI (Cut, Graze, or harvest)
        private string typeOfDefoliation;              // type of defoliation, as defined in Defoliate() (Cut, Graze, or harvest)
        private string baseAmountType;                  // type of DM amount, as set in UI (ResidualDM or DMToRemove)
        private string typeOfAmount;                  // type of DM amount, as defined in Defoliate() (ResidualDM, DMToRemove, or UseDefoliationFractions)
        private double amountGiven;                      // DM amount given, to use in the defoliation management (g/m2)
        private double herbageToRemove;                  // total herbage to remove per day (g/m2)
        private RemovalFractions defoliationFractions;// fraction of each organ to defoliate (PMF species)
        private double[] urineFraction;                  // fraction of urine to be applied in each soil layer
        private int durationOfDefoliation;              // duration of a defoliation event
        private int daysDefoliating;                  // counter for days within a defoliation event
        private double cumAmountHarvested;              // cumulative defoliated amount within each event
        // auxiliary boolean
        private bool aDefoliationHasHappened = false; // flag whether a defoliation has happened in this simulation run

        // auxiliary - lists of species and removal fractions
        private string[] swardSpeciesName;              // name of each species in the sward
        private string[] swardSpeciesType;              // type of each species in the sward (PMF or AgPasture)
        private double[] speciesFraction;              // biomass fraction of harvestable material of each species

        [EventSubscribe("Commencing")]
        private void OnSimulationCommencing(object sender, EventArgs e)
        {
            // check the type of defoliation given
            if (DefoliateType == DefoliationTypes.Cut)
                baseDefoliationType = "Cut";
            else if (DefoliateType == DefoliationTypes.Graze)
                baseDefoliationType = "Graze";
            else
                baseDefoliationType = "Harvest";

            // check the type of amount given
            if (RemoveAmountType == DefoliateAmountTypes.DMToRemove)
                baseAmountType = "DMToRemove";
            else if (RemoveAmountType == DefoliateAmountTypes.ResidualDM)
                baseAmountType = "ResidualDM";
            else
                baseAmountType = "UseDefoliationFractions";

            // check the interval between events
            if (IntervalBetweenDefoliations < 1)
                throw new Exception("The interval between defoliation events must be at least one day");

            // check the duration for each defoliation
            if(DurationOfEachDefoliation <= 0)
                throw new Exception("The duration of defoliations cannot be zero or negative!");

            // check the fraction of defoliated material to remove from the field
            if (DMRemoveType == DMRemovalTypes.RemoveAll)
                FractionDMToRemove = 1.0;
            else if (DMRemoveType == DMRemovalTypes.RemoveNone)
                FractionDMToRemove = 0.0;
            else if (DMRemoveType == DMRemovalTypes.BasedOnDigestibility)
                FractionDMToRemove = -1.0;  // will be calculated dynamically
            else // DMRemoveType == DMRemovalTypes.UserDefinedFraction
            {
                if (FractionDMToRemove < 0.0)
                    throw new Exception("The fraction of DM defoliated to remove from the field cannot be negative!");
            }

            // check the fraction of defoliated N to remove from the field
            if (NRemoveType == NRemovalTypes.RemoveAll)
                FractionNToRemove = 1.0;
            else if (NRemoveType == NRemovalTypes.RemoveNone)
                FractionNToRemove = 0.0;
            else if (NRemoveType == NRemovalTypes.ProportionalToDM)
                FractionNToRemove = FractionDMToRemove;
            else // NRemoveType == NRemovalTypes.UserDefinedFraction
            {
                if (FractionNToRemove < 0.0)
                    throw new Exception("The fraction of defoliated N to remove from the field cannot be negative!");
            }

            // set up the links to all plant species
            foreach (Plant species in Apsim.Children(myZone, typeof(Plant)))
                PMFSpecies.Add(species);
            foreach (AgPasture.PastureSpecies species in Apsim.Children(myZone, typeof(AgPasture.PastureSpecies)))
                AgPSpecies.Add(species);

            int numPlants = PMFSpecies.Count + AgPSpecies.Count;
            swardSpeciesName = new string[numPlants];
            swardSpeciesType = new string[numPlants];
            int i = 0;
            foreach (Plant species in Apsim.Children(myZone, typeof(Plant)))
            {
                swardSpeciesName[i] = species.Name;
                swardSpeciesType[i] = "PMF";
                i += 1;
            }
            foreach (AgPasture.PastureSpecies species in Apsim.Children(myZone, typeof(AgPasture.PastureSpecies)))
            {
                swardSpeciesName[i] = species.Name;
                swardSpeciesType[i] = "AgPasture";
                i += 1;
            }

            // make sure that management starts when RotationStartDate < simulationStartDay
            if ((clock.Today > DefoliationRotationStartDate) && (clock.Today < DefoliationRotationEndDate))
                DefoliationRotationStartDate = clock.Today;

            // initialise some variables
            speciesFraction = new double[numPlants];
            defoliationFractions = new RemovalFractions();
            DaysSinceLastDefoliation = 0;
            durationOfDefoliation = -1;
            daysDefoliating = 0;
            resetMyOutputs();

            // set the fraction of urine for each layer
            if (ReturnType == ReturnAsTypes.AsDungUrine)
            {
                double depthFromSurface = 0.0;
                for (int layer = 0; layer < mySoil.Thickness.Length; layer++)
                {
                    depthFromSurface += mySoil.Thickness[layer];
                    if (depthFromSurface >= UrineDepth)
                    { // bottom layer found
                        urineFraction = new double[layer + 1];
                        double atZ0;
                        double atZ1;
                        double distFactor = 1.5;
                        double totalProp = UrineDepth * Math.Pow(1.0, distFactor) / (distFactor + 1.0);
                        depthFromSurface = 0.0;
                        atZ1 = (UrineDepth - depthFromSurface) * Math.Pow(1.0 - depthFromSurface / UrineDepth, distFactor) / (distFactor + 1.0);
                        for (int z = 0; z < layer+1; z++)
                        {
                            atZ0 = atZ1;
                            depthFromSurface += mySoil.Thickness[z];
                            atZ1 = (UrineDepth - depthFromSurface) * Math.Pow(1.0 - depthFromSurface / UrineDepth, distFactor) / (distFactor + 1);
                            if (1.0 - (depthFromSurface / UrineDepth) < 0.0)
                                atZ1 = 0;
                            urineFraction[z] = (atZ0 - atZ1) / totalProp;
                        }
                        layer = mySoil.Thickness.Length;
                    }
                }
            }

            // write message in summary
            mySummary.WriteMessage(this," Automatic defoliation manager initialised");
            if (AutomaticManagementIsEnabled)
            {
                mySummary.WriteMessage(this, "   Defoliations will happen between " + DefoliationRotationStartDate.ToShortDateString()
                                          + " and " + DefoliationRotationEndDate.ToShortDateString() + ".");
                mySummary.WriteMessage(this, "   Biomass from the sward will be defoliated simulating a \"" + baseDefoliationType + "\" rotation.");
                if (DefoliationTriggerType == DefoliationTriggerTypes.TargetStandingBiomass)
                    mySummary.WriteMessage(this, "   Events will happen whenever aboveground biomass surpasses " + TargetStandingBiomass.ToString("#0.0") + " g/m2.");
                else
                    mySummary.WriteMessage(this, "   Events will happen every " + IntervalBetweenDefoliations + " days, if there is enough biomass.");
                if(baseAmountType == "ResidualDM")
                    mySummary.WriteMessage(this, "   Removing biomass down to a residual amount of " + AmountForEachDefoliation.ToString("#.0") + " g/m2 over " 
                                             + DurationOfEachDefoliation + " days.");
                else
                    mySummary.WriteMessage(this, "   Removing " + AmountForEachDefoliation.ToString("#.0") + " g/m2 of biomass per day over " 
                                             + DurationOfEachDefoliation + " days.");
            }
            else
            {
                mySummary.WriteMessage(this,"   Automatic defoliations are currently disabled, though defoliations can be triggered by another manager");
                mySummary.WriteMessage(this,"   If called, the manager will remove biomass from the sward simulating a \"" + baseDefoliationType + "\" event.");
            }

            if(ReturnType == ReturnAsTypes.AsDungUrine)
            {
                mySummary.WriteMessage(this,"   Non-removed material will be returned as dung and urine. Urine added to soil according to proportions: "
                + string.Join(", ",urineFraction));
            }
            else
                mySummary.WriteMessage(this,"   Non-removed material will be returned as residue.");
        }

        [EventSubscribe("DoManagement")]
        private void OnDoManagement(object sender, EventArgs e)
        {
            // check whether we need to continue defoliationg, i.e. within a multi-day defoliation event (need to check this first in the day)
            if ((daysDefoliating > 0) && (daysDefoliating < durationOfDefoliation))
            {
                // reset outputs
                resetMyOutputs();

                // re-check the amount to defoliate
                double harvestableBiomass = harvestableSwardBiomass("All", "Harvestable");
                if (typeOfAmount == "DMToRemove")
                {
                    if(harvestableBiomass > 0.001)
                        herbageToRemove = Math.Min(harvestableBiomass, (amountGiven - cumAmountHarvested) / (durationOfDefoliation - daysDefoliating));
                }
                else if (typeOfAmount == "ResidualDM")
                {
                    double currentDM = standingSwardBiomassWt;
                    if (currentDM > amountGiven)
                        herbageToRemove = Math.Min(harvestableBiomass, (currentDM - amountGiven) / (durationOfDefoliation - daysDefoliating));
                }

                // remove plant biomass and return residue
                if (Math.Abs(herbageToRemove) >= 0.001)
                {
                    // set biomass removal
mySummary.WriteMessage(this, "   Defoliation initialised on DoManagement - " + clock.Today.Date.ToShortDateString());
                    defoliateSward(herbageToRemove, typeOfDefoliation);

                    // return residue or excreta
                    if(ReturnedWt + ReturnedN > 0.0)
                    {
                        if (ReturnType == ReturnAsTypes.AsResidue)
                            returnResidues();
                        else
                            returnExcreta();
                    }

                    // gather amount removed this event
                    cumAmountHarvested += HarvestedWt;
                }

                daysDefoliating += 1;
            }

            // check whether a defoliation ended yesterday
            if (daysDefoliating < 0)
            { // clean up variables
                resetMyOutputs();
                daysDefoliating = 0;
            }

            // check whether automatic defoliations are enabled
            if (AutomaticManagementIsEnabled)
            {
                // check whether we are within the period in which defoliations can happen
                if ((clock.Today.Date >= DefoliationRotationStartDate.Date) && (clock.Today.Date <= DefoliationRotationEndDate.Date))
                {
                    if (clock.Today.Date == DefoliationRotationStartDate.Date)
                        DaysSinceLastDefoliation = IntervalBetweenDefoliations;

                    // check whether we should start a defoliation event
                    if (DefoliationTriggerType == DefoliationTriggerTypes.FixedInterval)
                    {
                        if (DaysSinceLastDefoliation == IntervalBetweenDefoliations)
                            Defoliate(baseDefoliationType, AmountForEachDefoliation, baseAmountType, DurationOfEachDefoliation);
                    }
                    else if (DefoliationTriggerType == DefoliationTriggerTypes.TargetInterval)
                    {
                        if (DaysSinceLastDefoliation >= IntervalBetweenDefoliations)
                            Defoliate(baseDefoliationType, AmountForEachDefoliation, baseAmountType, DurationOfEachDefoliation);
                    }
                    else  //DefoliationTriggerType == DefoliationTriggerTypes.TargetStandingBiomass
                    {
                        if (standingSwardBiomassWt >= TargetStandingBiomass)
                            Defoliate(baseDefoliationType, AmountForEachDefoliation, baseAmountType, DurationOfEachDefoliation);
                    }
                }
                //// Note: Only the code above, responsible for triggering automatic events, is limited by 'AutomaticManagementIsEnabled'. 
                ////       The rest of the code is still available to perform one-off defoliations.
                ////       It can be called from another manager or a schedulle thingy via Defoliate().
            }
        }

        [EventSubscribe("DoManagementCalculations")]
        private void OnDoManagementCalculations(object sender, EventArgs e)
        {
            // check whether a defoliation event has just been completed
            if (daysDefoliating == durationOfDefoliation)
            {
                // get amount of biomass remaining and zero counters
                PostHarvestDM = standingSwardBiomassWt;
                RotationHarvestedDM = cumAmountHarvested;
                aDefoliationHasHappened = true;
                daysDefoliating = -1;
            }

            // count the days after a defoliation
            if (aDefoliationHasHappened && (daysDefoliating == 0))
                DaysSinceLastDefoliation += 1;
        }

        /// <summary>Sets up a defoliation event.</summary>
        /// <param name="defoliationType">Type of defoliation (cut, graze, or harvest)</param>
        /// <param name="amountDM">Amount of biomass to use (g/m2)</param>
        /// <param name="amountType">How the DM amount is interpreted (toRemove, residual)</param>
        /// <param name="duration">Number of days to defoliate over</param>
        public void Defoliate(string defoliationType, double amountDM, string amountType, int duration)
        {
            // check whether there are plants in the sward that can be defoliated
            if (swardHasLivingPlants)
            {
                // check the defoliation type
                if (defoliationType.ToLower() == "cut")
                    typeOfDefoliation = "Cut";
                else if (defoliationType.ToLower() == "graze")
                    typeOfDefoliation = "Graze";
                else if (defoliationType.ToLower() == "harvest")
                    typeOfDefoliation = "Harvest";
                else
                    throw new Exception("Defoliation type should be either \"Cut\", \"Graze\", or \"Harvest\"!");

                // check DM amount given
                if (amountDM < 0.0)
                    throw new Exception("Amount to defoliate cannot be negative!");
                else
                    amountGiven = amountDM;

                // check the type of amount given
                if (amountType.ToLower() == "dmtoremove")
                    typeOfAmount = "DMToRemove";
                else if (amountType.ToLower() == "residualdm")
                    typeOfAmount = "ResidualDM";
                else if (amountType.ToLower() == "usedefoliationfractions")
                    typeOfAmount = "UseDefoliationFractions";
                else
                    throw new Exception("Amount type should be \"DMToRemove\", \"ResidualDM\", or \"UseDefoliationFractions\"!");

                // check duration given
                if (duration <= 0)
                    throw new Exception("Duration of defoliation cannot be zero or negative!");
                else
                    durationOfDefoliation = duration;

                // check existing biomass and amount to remove
                PreHarvestDM = standingSwardBiomassWt;
                herbageToRemove = 0.0;
                double harvestableBiomass = harvestableSwardBiomass("All", "Harvestable");
                if (typeOfAmount == "UseDefoliationFractions")
                { // amount given is ignored, removal based on fractions
                    amountGiven = 0.0;
                    if (harvestableBiomass > 0.0)
                        herbageToRemove = -1.0;

                    mySummary.WriteMessage(this, "   Defoliation triggered, removing biomass using the removal fractions (set or default), during " + durationOfDefoliation + " days");
                }
                else if (typeOfAmount == "DMToRemove")
                {
                    if (amountGiven > 0.001)
                    { // a meaningful amount was given, check whether all can be removed
                        if (harvestableBiomass > 0.001)
                            herbageToRemove = Math.Min(harvestableBiomass, amountGiven / durationOfDefoliation);

                        mySummary.WriteMessage(this, "   Defoliation triggered, attempting to remove " + amountGiven.ToString("#0.0") + " g/m2 of biomass over " + durationOfDefoliation + " days");
                    }
                }
                else if (typeOfAmount == "ResidualDM")
                {
                    // check how much biomass will be removed
                    if (PreHarvestDM > amountGiven)
                        herbageToRemove = Math.Min(harvestableBiomass, (PreHarvestDM - amountGiven) / durationOfDefoliation);

                    mySummary.WriteMessage(this, "   Defoliation triggered, attempting to remove biomass down to " + amountGiven.ToString("#0.0") + " g/m2 over " + durationOfDefoliation + " days");
                }

                // can defoliation begin?
                if (Math.Abs(herbageToRemove) >= 0.001)
                {
                    // set off first defoliation
mySummary.WriteMessage(this, "   Defoliation initialised on Defoliate - " + clock.Today.Date.ToShortDateString());
                    defoliateSward(herbageToRemove, typeOfDefoliation);

                    // return residue or excreta
                    if(ReturnedWt + ReturnedN > 0.0)
                    {
                        if (ReturnType == ReturnAsTypes.AsResidue)
                            returnResidues();
                        else
                            returnExcreta();
                    }

                    // gather values for this event
                    cumAmountHarvested = HarvestedWt;
                    daysDefoliating = 1;
                    DaysSinceLastDefoliation = 0;
                }
                else
                {
                    // abort command as there is not enough biomass, check interval type
                    if (DefoliationTriggerType == DefoliationTriggerTypes.FixedInterval)
                    { // count the event as if it did happen
                        cumAmountHarvested = 0.0;
                        daysDefoliating = 1;
                        DaysSinceLastDefoliation = 0;
                    }

                    mySummary.WriteMessage(this, "   Defoliation did not happend because current biomass (" + PreHarvestDM.ToString("#0.0") + " g/m2) is too low (total harvestable = " + harvestableBiomass.ToString("#0.0") + " g/m2)");
                }
            }
            else
            {
                mySummary.WriteMessage(this, "   Defoliation did not happend because there is no growing plants in the sward");
            }
        }

        /// <summary>Resets the values of outputs.</summary>
        private void resetMyOutputs()
        {
            DefoliatedWt = 0.0;
            DefoliatedN = 0.0;
            HarvestedWt = 0.0;
            HarvestedN = 0.0;
            RemovedWt = 0.0;
            RemovedN = 0.0;
            ReturnedWt = 0.0;
            ReturnedN = 0.0;
            NReturnedInDung = 0.0;
            NReturnedInUrine = 0.0;
            RotationHarvestedDM = 0.0;
        }

        /// <summary>Flags whether there is any living plant in the sward.</summary>
        private bool swardHasLivingPlants
        {
            get
            {
                bool result = false;
                foreach (Plant species in PMFSpecies)
                       result |= species.IsAlive;
                foreach (AgPasture.PastureSpecies species in AgPSpecies)
                       result |= species.IsAlive;
                return result;
            }
        }

        /// <summary>Amount of plant biomass aboveground (g/m2).</summary>
        private double standingSwardBiomassWt
        {
            get
            {
                double result = 0.0;
                foreach (Plant species in PMFSpecies)
                   result += (double)myZone.Get(species.Name+".AboveGround.Wt");
                foreach (AgPasture.PastureSpecies species in AgPSpecies)
                    result += species.StandingHerbageWt*0.1;
                return result;
            }
        }

        /// <summary>Amount of N in plant's biomass aboveground (g/m2).</summary>
        private double standingSwardBiomassN
        {
            get
            {
                double result = 0.0;
                foreach (Plant species in PMFSpecies)
                   result += (double)myZone.Get(species.Name+".AboveGround.N");
                foreach (AgPasture.PastureSpecies species in AgPSpecies)
                    result += species.StandingHerbageN*0.1;
                return result;
            }
        }

        /// <summary>Amount of plant biomass from all organs available for defoliation (g/m2).</summary>
        /// <remarks>Assumes that organs with a BiomassRemoval.FractionToRemove > 0 are harvestable.
        /// For AgPasture, harvestable is based on minimum DM.</remarks>
        /// <param name="plantName">The name of the plant to retrieve its biomass</param>
        /// <param name="fractionType">The type of fraction to use (harvestable or total)</param>
        private double harvestableSwardBiomass(string plantName, string fractionType)
        {
            double amountWt = 0.0;
            double fraction = 0.0;
            foreach (Plant species in PMFSpecies)
            {
                if ((plantName == "All") || (species.Name == plantName))
                {
                    if (species.AboveGround.Wt > 0.0)
                    {
                        foreach (IOrgan organ in Apsim.Children(species, typeof(IOrgan)))
                        { // consider only amounts toRemove
                            fraction = (double)myZone.Get(species.Name + "." + organ.Name + ".BiomassRemovalDefaults." + typeOfDefoliation + ".FractionLiveToRemove");
                            if ((fractionType == "Total") && (fraction > 0.0))
                                fraction = 1.0;
                            else if (RemoveAllBiomassIsEnabled && (fraction > 0.0))
                                fraction = 0.95;
                            amountWt += (double)myZone.Get(species.Name + "." + organ.Name + ".Live.Wt") * fraction;
                            fraction = (double)myZone.Get(species.Name + "." + organ.Name + ".BiomassRemovalDefaults." + typeOfDefoliation + ".FractionDeadToRemove");
                            if ((fractionType == "Total") && (fraction > 0.0))
                                fraction = 1.0;
                            else if (RemoveAllBiomassIsEnabled && (fraction > 0.0))
                                fraction = 0.95;
                            amountWt += (double)myZone.Get(species.Name + "." + organ.Name + ".Dead.Wt") * fraction;
                        }
                    }
                }
            }

            foreach (AgPasture.PastureSpecies species in AgPSpecies)
            {
                if ((plantName == "All") || (species.Name == plantName))
                {
                    if (fractionType == "Total")
                        amountWt += species.AboveGroundWt*0.1;
                    else
                        amountWt += species.HarvestableWt*0.1;
                }
            }

            return amountWt;
        }

        /// <summary>Triggers the actual biomass removal and gather DM and N amounts.</summary>
        /// <param name="amountToRemove">The total DM amount to remove (g/m2)</param>
        /// <param name="removalType">The type of removal (Cut, Graze, Harvest)</param>
        private void defoliateSward(double amountToRemove, string removalType)
        {
            // get the amounts of biomass and N before today's defoliation
            double preRemovalDM = standingSwardBiomassWt;
            double preRemovalN = standingSwardBiomassN;
            double fractionToRemove = 0.0;

            // gather the actual biomass removal fractions, checking whether they need to be adjusted
            double totalHarvestableAmount = harvestableSwardBiomass("All", "Harvestable");
            if (amountToRemove > 0.0)
            { // an amount was given for defoliation, adjust removal fractions for each species in order to remove the amount specified
                fractionToRemove = amountToRemove / totalHarvestableAmount;
            }
            else if (amountToRemove < 0.0)
            { // defoliation is not based on an amount, removal is determined simply by the removal fractions
                fractionToRemove = 1.0;
            }

            for (int i = 0; i < swardSpeciesName.Length; i++)
            {
                speciesFraction[i] = harvestableSwardBiomass(swardSpeciesName[i], "Harvestable") / totalHarvestableAmount;
                if (swardSpeciesType[i] == "PMF")
                {
                    // check whether the plant is alive
                    bool speciesIsAlive = (bool)myZone.Get(swardSpeciesName[i]+".IsEmerged");
                    if (speciesIsAlive)
                    {
                        // set removal fractions (these overrides the default removals in the plant)
                        setRemoveFraction(swardSpeciesName[i], fractionToRemove);

                        // do the actual biomass removal
                        foreach (Plant species in PMFSpecies)
                        {
                            if(species.Name == swardSpeciesName[i])
                            {
                                species.RemoveBiomass(removalType, defoliationFractions);
                                break;
                            }
                        }
                    }
                }
                else
                {
                    // check whether the plant is alive
                    bool speciesIsAlive = (bool)myZone.Get(swardSpeciesName[i]+".IsAlive");
                    if (speciesIsAlive)
                    {
                        // set removal amount (needs to be in kg/ha)
                        double amountRequired = (double)myZone.Get(swardSpeciesName[i]+".HarvestableWt");
                        if (amountToRemove > 0.0)
                            amountRequired = amountToRemove * speciesFraction[i] * 10.0;

                        // do the actual biomass removal
                        foreach (AgPasture.PastureSpecies species in AgPSpecies)
                        {
                            if(species.Name == swardSpeciesName[i])
                            {
                                species.RemoveBiomass(amount: amountRequired, type: "SetRemoveAmount");
                                break;
                            }
                        }
                    }
                }
            }

            // get the amounts of biomass and N after today's defoliation
            double postRemovalDM = standingSwardBiomassWt;
            double postRemovalN = standingSwardBiomassN;

            // get total defoliation (total plant stuff lost)
            DefoliatedWt = preRemovalDM - postRemovalDM;
            DefoliatedN = preRemovalN - postRemovalN;

            // get amounts harvested, removed, and returned
            manageDefoliatedBiomass();
        }

        /// <summary>Sets the biomass removal fractions for PMF plants.</summary>
        /// <param name="plantName">The name of PMF species</param>
        /// <param name="fractionHarvestable">The fraction of harvestable biomass to be removed (0-1)</param>
        private void setRemoveFraction(string plantName, double fractionHarvestable)
        {
            foreach (Plant species in PMFSpecies)
            {
                if ((species.Name == plantName) && (species.IsAlive))
                {
                    double fractionToRemove;
                    double fractionToResidue;

                    // set removal fractions (these overrides the default removals in the plant)
                    foreach (IOrgan organ in Apsim.Children(species, typeof(IOrgan)))
                    {
                        // first get the removal for Live material
                        fractionToRemove = (double)myZone.Get(species.Name + "." + organ.Name + ".BiomassRemovalDefaults." + typeOfDefoliation + ".FractionLiveToRemove");
                        if (RemoveAllBiomassIsEnabled && (fractionToRemove > 0.0))
                            fractionToRemove = 0.95;
                        fractionToRemove = fractionHarvestable * fractionToRemove;
                        fractionToRemove = Math.Min(1.0, fractionToRemove);
                        defoliationFractions.SetFractionToRemove(organ.Name, fractionToRemove, "Live");
                        if (RemoveAllBiomassIsEnabled)
                            fractionToResidue = 0.0;
                        else
                            fractionToResidue = (double)myZone.Get(species.Name + "." + organ.Name + ".BiomassRemovalDefaults." + typeOfDefoliation + ".FractionLiveToResidue");
                        fractionToResidue = Math.Min(fractionHarvestable * fractionToResidue, 1.0 - fractionToRemove);
                        defoliationFractions.SetFractionToResidue(organ.Name, fractionToResidue, "Live");

                        // then get the removal for Dead material
                        fractionToRemove = (double)myZone.Get(species.Name + "." + organ.Name + ".BiomassRemovalDefaults." + typeOfDefoliation + ".FractionDeadToRemove");
                        if (RemoveAllBiomassIsEnabled && (fractionToRemove > 0.0))
                            fractionToRemove = 0.95;
                        fractionToRemove = fractionHarvestable * fractionToRemove;
                        fractionToRemove = Math.Min(1.0, fractionToRemove);
                        defoliationFractions.SetFractionToRemove(organ.Name, fractionToRemove, "Dead");
                        if (RemoveAllBiomassIsEnabled)
                            fractionToResidue = 0.0;
                        else
                            fractionToResidue = (double)myZone.Get(species.Name + "." + organ.Name + ".BiomassRemovalDefaults." + typeOfDefoliation + ".FractionDeadToResidue");
                        fractionToResidue = Math.Min(fractionHarvestable * fractionToResidue, 1.0 - fractionToRemove);
                        defoliationFractions.SetFractionToResidue(organ.Name, fractionToResidue, "Dead");
                    }
                }
            }
        }

        /// <summary>Gathers the DM and N amounts harvested, to be removed, and to be returned.</summary>
        private void manageDefoliatedBiomass()
        {
            double digestibilityStructural = 0.65;
            double digestibilityNonStrucutural = 1.0;

            if (DefoliatedWt > 0.0)
            {
                double speciesHarvestedWt;
                double speciesHarvestedN;
                double speciesFractionToRemove;
                HarvestedWt = 0.0;
                HarvestedN = 0.0;
                RemovedWt = 0.0;
                RemovedN = 0.0;

                foreach (Plant species in PMFSpecies)
                {
                    if(species.AboveGround.Wt > 0.0)
                    {
                        // get the amount harvested (plant stuff removed from plants)
                        speciesHarvestedWt = 0.0;
                        speciesHarvestedN = 0.0;
                        foreach (IOrgan organ in Apsim.Children(species, typeof(IOrgan)))
                        {
                            speciesHarvestedWt += (double)myZone.Get(species.Name+"."+organ.Name+".Removed.Wt");
                            speciesHarvestedN += (double)myZone.Get(species.Name+"."+organ.Name+".Removed.N");
                        }

                        HarvestedWt += speciesHarvestedWt;
                        HarvestedN += speciesHarvestedN;

                        // get the DM fraction to be removed
                        if(FractionDMToRemove>=0.0)
                        {
                            speciesFractionToRemove = FractionDMToRemove;
                        }
                        else
                        { // use digestibility to define the fraction
                            double fracStructural = species.AboveGround.StructuralWt/species.AboveGround.Wt;
                            speciesFractionToRemove = (1.0 - fracStructural)*digestibilityNonStrucutural + fracStructural*digestibilityStructural;
                            speciesFractionToRemove = Math.Min(1.0, Math.Max(0.0, speciesFractionToRemove));
                        }

                        // get the amounts actually removed from field
                        RemovedWt += speciesHarvestedWt * speciesFractionToRemove;
                        RemovedN += speciesHarvestedN * FractionNToRemove;
                   }
                }

                foreach (AgPasture.PastureSpecies species in AgPSpecies)
                {
                    if(species.AboveGroundWt > 0.0)
                    {
                        // get the amount harvested
                        speciesHarvestedWt = species.HarvestedWt*0.1;
                        speciesHarvestedN = species.HarvestedN*0.1;
                        HarvestedWt += speciesHarvestedWt;
                        HarvestedN += speciesHarvestedN;

                        // get fraction to be removed
                        if(FractionDMToRemove>=0.0)
                        {
                            speciesFractionToRemove = FractionDMToRemove;
                        }
                        else
                        { // use digestibility to define the fraction
                            speciesFractionToRemove = species.HarvestedDigestibility;
                        }

                        // get the amounts actually removed from field
                        RemovedWt += speciesHarvestedWt * speciesFractionToRemove;
                        RemovedN += speciesHarvestedN * FractionNToRemove;
                    }
                }

                // get the amounts to be returned to the field (as residue or dung+urine)
                ReturnedWt = HarvestedWt - RemovedWt;
                ReturnedN = HarvestedN - RemovedN;
                if (ReturnType == ReturnAsTypes.AsDungUrine)
                {
                    if (NDungType == DungNContentTypes.DefineProportion)
                        NReturnedInDung = ReturnedN * ProportionN2Dung;
                    else
                        NReturnedInDung = Math.Min(ReturnedN, ReturnedWt * 0.4 / CNRatioDung);
                    NReturnedInDung = Math.Min(NReturnedInDung, ReturnedN);
                    NReturnedInUrine = ReturnedN - NReturnedInDung;
                }
                else
                {
                    NReturnedInDung = 0.0;
                    NReturnedInUrine = 0.0;
                }
            }
        }

        /// <summary>Returns the material not removed off field as residue.</summary>
        private void returnResidues()
        {
            if ((ReturnedWt > 0.0) || (ReturnedN > 0.0))
            {
                PMF.BiomassRemovedType BiomassResidue = new PMF.BiomassRemovedType();
                string[] type = new string[] { "Grass" };
                float[] dltdm = new float[] { (float)(10.0 * ReturnedWt) };
                float[] dltn = new float[] { (float)(10.0 * ReturnedN) };
                float[] dltp = new float[] { 0 };
                float[] fraction = new float[] { 1 };     // fraction is always 1.0 here

                BiomassResidue.crop_type = "Grass";
                BiomassResidue.dm_type = type;
                BiomassResidue.dlt_crop_dm = dltdm;
                BiomassResidue.dlt_dm_n = dltn;
                BiomassResidue.dlt_dm_p = dltp;
                BiomassResidue.fraction_to_residue = fraction;
                BiomassRemoved.Invoke(BiomassResidue);
            }
        }

        /// <summary>Returns the material not removed off field as dung and urine).</summary>
        private void returnExcreta()
        {
            if ((ReturnedWt > 0.0) || (NReturnedInDung > 0.0))
            {
                PMF.BiomassRemovedType BiomassDung = new PMF.BiomassRemovedType();
                string[] type = new string[] { "RuminantDung_PastureFed" };
                float[] dltdm = new float[] { (float)(10.0 * ReturnedWt) };
                float[] dltn = new float[] { (float)(10.0 * NReturnedInDung) };
                float[] dltp = new float[] { 0 };
                float[] fraction = new float[] { 1 };     // fraction is always 1.0 here

                BiomassDung.crop_type = "RuminantDung_PastureFed";
                BiomassDung.dm_type = type;
                BiomassDung.dlt_crop_dm = dltdm;
                BiomassDung.dlt_dm_n = dltn;
                BiomassDung.dlt_dm_p = dltp;
                BiomassDung.fraction_to_residue = fraction;
                BiomassRemoved.Invoke(BiomassDung);
            }

            if (NReturnedInUrine > 0.0)
            {
                double[] myUrineDeposition = new double[mySoil.Thickness.Length];
                for (int z = 0; z < urineFraction.Length; z++)
                    myUrineDeposition[z] = NReturnedInUrine * 10.0 * urineFraction[z];
                Urea.AddKgHaDelta(SoluteSetterType.Fertiliser, myUrineDeposition);
            }
        }

        // Auxiliary bits and pieces  - - - - - - - - - - - - - - - - - - - - - - - - - - - - - - - - -

        /// <summary>Type of defoliation to use</summary>
        public enum DefoliationTypes
        {
            /// <summary>Cut</summary>
            Cut,
            /// <summary>Graze</summary>
            Graze,
            /// <summary>Harvest</summary>
            Harvest
        }

        /// <summary>Flag how defoliations will be triggered</summary>
        public enum DefoliationTriggerTypes
        {
            /// <summary>Setting a fixed interval</summary>
            FixedInterval,
            /// <summary>Setting a target (minimum) inteval</summary>
            TargetInterval,
            /// <summary>Setting a target (maximum) standing biomass</summary>
            TargetStandingBiomass
        }

        /// <summary>How the DM amount given is interpreted</summary>
        public enum DefoliateAmountTypes
        {
            /// <summary>Setting a DM amount to remove</summary>
            DMToRemove,
            /// <summary>Setting the residual DM amount</summary>
            ResidualDM,
            /// <summary>Remove according to crop's BiomassRemovalFractions</summary>
            None_UseDefoliationFractions
        }

        /// <summary>Fraction of defoliated DM to remove from field</summary>
        public enum DMRemovalTypes
        {
            /// <summary>Remove all DM</summary>
            RemoveAll,
            /// <summary>Remove no DM</summary>
            RemoveNone,
            /// <summary>Remove a user-defined fraction</summary>
            UserDefinedFraction,
            /// <summary>Remove a fraction based on plant digestibility</summary>
            BasedOnDigestibility
        }

        /// <summary>Fraction of N in the defoliated material to remove from field</summary>
        public enum NRemovalTypes
        {
            /// <summary>Remove all N</summary>
            RemoveAll,
            /// <summary>Remove no N</summary>
            RemoveNone,
            /// <summary>Remove a user-defined fraction</summary>
            UserDefinedFraction,
            /// <summary>Remove a fraction equal to DM removed</summary>
            ProportionalToDM
        }

        /// <summary>Define how the non-removed material is returned to the field</summary>
        public enum ReturnAsTypes
        {
            /// <summary>Return plant material as residue</summary>
            AsResidue,
            /// <summary>Return meterial as dung and urine</summary>
            AsDungUrine
        }

        /// <summary>Define how the proportion of N in dung is defined</summary>
        public enum DungNContentTypes
        {
            /// <summary>Define the proportion of N returned as dung</summary>
            DefineProportion,
            /// <summary>Define the C:N of dung</summary>
            DefineCNratio
        }
    }
}
```
        Manager ExtraVariables
```csharp
// This will be replaced by the "ExtraVariables" section in "Replacements"

using System;
using Models.Core;

namespace Models
{
    [Serializable] 
    public class Script : Model
    {
    }
}
```
      MicroClimate: a_interception=0; b_interception=1; c_interception=0; d_interception=0; soil_albedo=0.23; SoilHeatFluxFraction=0.4; MinimumHeightDiffForNewLayer=0; NightInterceptionFraction=0.5; ReferenceHeight=2
      Irrigation
      Fertiliser
      SurfaceOrganicMatter: InitialResidueName=grass; InitialResidueType=grass; InitialResidueMass=1000; InitialStandingFraction=0; InitialCPR=0; InitialCNR=30; FractionFaecesAdded=1
      Soil: SoilType=Udic Haplustept (US),  Immature Pallic Soil (NZ); LocalName=Paparua Deep Sandy Loam; Site=LURDF; NearestTown=Lincoln; Region=Canterbury; Country=New Zealand; Latitude=0; Longitude=0
        DataSource=Adapted based on data from the NZ National Soils Database plus published data (Carey et al, 2002; Schwaertzel et al, 2011; Woods et al, 2016)
        Comments=Different references name the soil at the site as either Templeton sandy loam or Paparua sandy loam (very similar soils)
        Chemical
          Thickness  NO3N       NH4N       PH
          100        11.1019    1.38773    6
          120        8.87479    1.00312    6
          150        4.05595    0.422709   6
          230        0.366719   0.0733439  6
          130        0.366719   0.0733439  6
          250        0.151593   0.0547699  6
          220        0.0729219  0.0170005  6
          300        0.0669254  0.0133851  6
        Physical
          Thickness  ParticleSizeClay  BD     AirDry  LL15   DUL    SAT    KS
          100        17.8              1.154  0.051   0.151  0.338  0.512  2559.2
          120        17.8              1.295  0.14    0.146  0.328  0.469  2142.3
          150        15.9              1.441  0.129   0.129  0.279  0.427  1019.5
          230        14.1              1.544  0.111   0.111  0.271  0.394  310.6
          130        7.3               1.505  0.08    0.08   0.244  0.413  434.9
          250        9.6               1.504  0.072   0.072  0.234  0.406  791
          220        7                 1.517  0.085   0.085  0.254  0.401  744.1
          300        9.5               1.479  0.082   0.082  0.257  0.413  411.2
          SoilCrop RedCloverSoil: LL=[0.151, 0.146, 0.129, 0.111, 0.08, 0.072, 0.085, 0.082]; KL=[0.12, 0.11, 0.08, 0.05, 0.02, 0.005, 0, 0]; XF=[1, 1, 1, 1, 1, 1, 1, 1]
        SoilWater: SummerDate=1-Oct; SummerU=8; SummerCona=4; WinterDate=1-Apr; WinterU=5; WinterCona=1.5; DiffusConst=88; DiffusSlope=35; Salb=0.2; CN2Bare=60; CNRed=20; CNCov=0.8; slope=0; discharge_width=0; catchment_area=0; max_pond=0; Thickness=[100, 120, 150, 230, 130, 250, 220, 300]; SWCON=[0.59, 0.59, 0.55, 0.48, 0.53, 0.5, 0.51, 0.45]; PrecipitationInterception=0
        Organic: FOMCNRatio=35
          Thickness  Carbon  SoilCNRatio  FBiom  FInert  FOM
          100        2.94    11.3         0.08   0.3     450
          120        2.17    11.3         0.055  0.45    412.5
          150        0.99    11.5         0.015  0.72    322.5
          230        0.35    11.75        0.009  0.87    150
          130        0.24    12           0.008  0.95    75
          250        0.2     12.25        0.007  0.99    45
          220        0.15    12.5         0.005  0.995   30
          300        0.1     12.5         0.005  0.995   15
        CERESSoilTemperature
        InitialWater Initial water: PercentMethod=1; FractionFull=0.75
        Sample Initial nitrogen: Thickness=[150, 150, 450, 250, 500]; SWUnits=Volumetric; OCUnits=Total; PHUnits=Water
        Nutrient
          DirectedGraphInfo={Nodes=[{Name=Inert, OutlineColour=Black}, {Name=SurfaceResidue, OutlineColour=Black}, {Name=FOMLignin, OutlineColour=Black}, {Name=FOMCellulose, OutlineColour=Black}, {Name=FOMCarbohydrate, OutlineColour=Black}, {Name=Microbial, OutlineColour=Black}, {Name=Humic, OutlineColour=Black}, {Name=Urea, OutlineColour=Black}, {Name=NO3, OutlineColour=Black}, {Name=NH4, OutlineColour=Black}, {Name=Atmosphere, OutlineColour=White}], Arcs=[{SourceName=SurfaceResidue, DestinationName=Microbial}, {SourceName=SurfaceResidue, DestinationName=Humic}, {SourceName=FOMLignin, DestinationName=Microbial}, {SourceName=FOMLignin, DestinationName=Humic}, {SourceName=FOMCellulose, DestinationName=Microbial}, {SourceName=FOMCellulose, DestinationName=Humic}, {SourceName=FOMCarbohydrate, DestinationName=Microbial}, {SourceName=FOMCarbohydrate, DestinationName=Humic}, {SourceName=Microbial, DestinationName=Microbial}, {SourceName=Microbial, DestinationName=Humic}, {SourceName=Humic, DestinationName=Microbial}, {SourceName=Urea, DestinationName=NH4}, {SourceName=NO3, DestinationName=Atmosphere}, {SourceName=NH4, DestinationName=NO3}]}
      Plant RedClover: CropType=RedClover; IsAlive=false; IsEnding=false; DaysAfterEnding=0
      Report: EventNames=[Clock].DoReport
        VariableNames:
          [Clock].Today as Date
          [RedClover].Population
          [RedClover].CropType
          [RedClover].Leaf.RadIntTot as InterceptedRadiation
          [Irrigation].IrrigationApplied as IrrigationApplied
          [Soil].SoilWater.Es as Evaporation
          [RedClover].Leaf.Transpiration as Transpiration
          [Soil].SoilWater.Drainage as Drainage
          [Soil].SoilWater.Runoff as Runoff
          sum([Soil].SoilWater.SWmm) as TotalSWC
          sum([Soil].DULmm) as TotalDUL
          sum([Soil].LL15mm) as TotalLL15
          [Fertiliser].NitrogenApplied as FertiliserN
          sum([Soil].SoilNitrogen.Denitrification) as DenitrifiedN
          ([Soil].SoilWater.LeachNH4 + [Soil].SoilWater.LeachNO3) as LeachedN
          (-1*[RedClover].Root.NUptake) as UptakeN
          [RedClover].Nodule.NFixed as FixedN
          (sum([Soil].SoilNitrogen.Urea.kgha) + sum([Soil].SoilNitrogen.NH4.kgha) + sum([Soil].SoilNitrogen.NO3.kgha)) as SoilNContent
          [RedClover].Total.Wt
          [RedClover].AboveGround.Wt
          [RedClover].BelowGround.Wt
          [RedClover].Leaf.Live.NConc
          [RedClover].Leaf.LAI
          [RedClover].Leaf.Live.Wt
          [RedClover].Stem.Live.Wt
          [RedClover].Inflorescence.Live.Wt
          [RedClover].Taproot.Live.Wt
          [RedClover].Root.Live.Wt
          [DefoliationManager].Script.DefoliatedWt as HarvestedWt
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