Simulations: Version=70
  Memo About this example
    # Report Model Documentation and Examples

    *Dean Holzworth (CSIRO, Australia) and Val Snow (AgResearch, New Zealand)*

    (Text last updated 24 October 2019)

    **Report** is the model in APSIM that is used to generate columns of simulation outputs for further analysis.

    The simulations in this example are to show examples of the different reporting capabilities and to provide a test that they continue to produce the correct results.

    The intention is that this documentation is read alongside the simulation that produced it to see the detail of the examples. The simulation is to be found under the "Examples" button as Report.apsim.
  DataStore
  Simulation SimpleReportingSim
    Clock: Start=1980-01-01; End=1990-12-31
    Summary SummaryFile
    Weather: FileName=%root%\Examples\WeatherFiles\Dalby.met
    SoilArbitrator
    Zone Field: Area=1; Slope=0; AspectAngle=0; Altitude=50
      Manager Sowing
        StartDate = 1-may
        EndDate = 10-jul
        MinESW = 100
        MinRain = 25
        RainDays = 7
        CultivarName = Hartog
        SowingDepth = 30
        RowSpacing = 250
        Population = 120
```csharp
using System;
using Models.Core;
using Models.PMF;
using Models.Soils;
using Models.Soils.Nutrients;
using Models.Utilities;
using APSIM.Shared.Utilities;

namespace Models
{
    [Serializable]
    public class Script : Model
    {
        [Link] Clock Clock;
        [Link] Fertiliser Fertiliser;
        [Link] Summary Summary;
        [Link] Plant Wheat;
        [Link] Soil Soil; 
        Accumulator accumulatedRain;
        
        [Description("Start of sowing window (d-mmm)")]
        public string StartDate { get; set;}
        [Description("End of sowing window (d-mmm)")]
        public string EndDate { get; set;}
        [Description("Minimum extractable soil water for sowing (mm)")]
        public double MinESW { get; set;}
        [Description("Accumulated rainfall required for sowing (mm)")]
        public double MinRain { get; set;}
        [Description("Duration of rainfall accumulation (d)")]
        public int RainDays { get; set;}
        [Description("Cultivar to be sown")]
        [Display(Type=DisplayType.CultivarName)]
        public string CultivarName { get; set;}
        [Description("Sowing depth (mm)")]
        public double SowingDepth { get; set;}        
        [Description("Row spacing (mm)")]
        public double RowSpacing { get; set;}    
        [Description("Plant population (/m2)")]
        public double Population { get; set;}    
        
        
        [EventSubscribe("Commencing")]
        private void OnSimulationCommencing(object sender, EventArgs e)
        {
            accumulatedRain = new Accumulator(this, "[Weather].Rain", RainDays);
        }
        

        [EventSubscribe("DoManagement")]
        private void OnDoManagement(object sender, EventArgs e)
        {
            accumulatedRain.Update();
            
            if (DateUtilities.WithinDates(StartDate,Clock.Today,EndDate) &&
                !Wheat.IsAlive &&
                MathUtilities.Sum(Soil.SoilWater.ESW) > MinESW &&
                accumulatedRain.Sum > MinRain)
            {
               Wheat.Sow(population:Population, cultivar:CultivarName, depth:SowingDepth, rowSpacing:RowSpacing);    
            }
        
        }
        
    }
}
```
      Manager Fertilise at sowing
        Crop = [Wheat]
        FertiliserType = UreaN
        Amount = 160
```csharp
using System;
using Models.Core;
using Models.PMF;
namespace Models
{
    [Serializable]
    public class Script : Model
    {
        [Link] Clock Clock;
        [Link] Fertiliser Fertiliser;
        [Link] Summary Summary;

        [Description("Crop to be fertilised")]
        public IPlant Crop { get; set; }

        [Description("Type of fertiliser to apply? ")] public Fertiliser.Types FertiliserType { get; set; }

    
        [Description("Amount of fertiliser to be applied (kg/ha)")]
        public double Amount { get; set; }
        
        [EventSubscribe("Sowing")]
        private void OnSowing(object sender, EventArgs e)
        {
            Model crop = sender as Model;
            if (Crop != null && crop.Name.ToLower() == (Crop as IModel).Name.ToLower())
            {
                Summary.WriteMessage(this, "Sowing fertilsier");
                Fertiliser.Apply(Amount: Amount, Type: FertiliserType);
            }
        }
        
    }
}
```
      Manager Harvest
```csharp
using System;
using Models.Core;
using Models.PMF;
using Models.Soils;
using Models.Soils.Nutrients;
using Models.Utilities;
using APSIM.Shared.Utilities;

namespace Models
{
    [Serializable]
    public class Script : Model
    {
        [Link] Plant Wheat;

        [EventSubscribe("DoManagement")]
        private void OnDoManagement(object sender, EventArgs e)
        {
            if (Wheat.IsReadyForHarvesting)
            {
               Wheat.Harvest();
               Wheat.EndCrop();    
            }
        
        }
        
    }
}
```
      Manager AutoIrrig
        FASW = 0
        WaterDeficit = 0
        AutoIrrigationOn = True
        FASWThreshold = 0.75
        FASWDepth = 600
```csharp
using System;
using Models.Core;
using System.Collections.Generic;
using System.Text;
using Models.Soils;
using Models.PMF;
using Models;
using System.Xml.Serialization;
using APSIM.Shared.Utilities;

namespace Models
{
    [Serializable] 
    public class Script : Model
    {
        public double FASW { get; set; }
        public double WaterDeficit  { get; set; }
    
        [Link] Zone zone;
        [Link] Irrigation irrigation;
        [Link] Soil soil;
        
        [Description("Auto irrigation on?")]
        public bool AutoIrrigationOn { get; set; }

        [Description("Threshold fraction available water (0-1)")]
        public double FASWThreshold { get; set; }

        [Description("Soil depth (mm) to which fraction available water is calculated")]
        public double FASWDepth { get; set; }

        [EventSubscribe("DoManagement")]
        private void OnDoManagement(object sender, EventArgs e)
        {
            CalculateFASW();
            if (AutoIrrigationOn)
            {
                if (FASW < FASWThreshold)
                {
                    double amount = 10;
                    irrigation.Apply(WaterDeficit, depth: 0);
                }
            }
        }
        
        private void CalculateFASW()
        {
            double[] LL15 = MathUtilities.Multiply(soil.LL15, soil.Thickness);
            double[] DUL = MathUtilities.Multiply(soil.DUL, soil.Thickness);
        
            int nlayr = GetLayerIndex();
            double cumdep = MathUtilities.Sum(soil.Thickness, 0, nlayr, 0.0);

            double excess_fr = MathUtilities.Divide((cumdep - FASWDepth), soil.Thickness[nlayr], 0.0);

            // note that results may be strange if swdep < ll15
            double avail_sw = (MathUtilities.Sum(soil.Water, 0, nlayr, 0.0)
                              - excess_fr * soil.Water[nlayr])
                              - (MathUtilities.Sum(LL15, 0, nlayr, 0.0)
                              - excess_fr * LL15[nlayr]);


            double pot_avail_sw = (MathUtilities.Sum(DUL, 0, nlayr, 0.0)
                                  - excess_fr * DUL[nlayr])
                                  - (MathUtilities.Sum(LL15, 0, nlayr, 0.0)
                                  - excess_fr * LL15[nlayr]);

            FASW = MathUtilities.Divide(avail_sw, pot_avail_sw, 0.0);
            WaterDeficit = MathUtilities.Constrain(pot_avail_sw - avail_sw, 0.0, 100000);
        }

        private int GetLayerIndex()
        {
            double[] cumThickness = soil.ThicknessCumulative;
            for (int i = 1; i < cumThickness.Length; i++)
            {
                if (FASWDepth < cumThickness[i])
                    return i - 1;
            }
            
            return cumThickness.Length - 1;
        }

    }
}
```
      Manager ReportHelper
        ReportEveryYear_Name = [ReportOnSpecificDaysEveryYear]
        ReportEveryYear_Dates = 21-mar,23-nov,11-aug
        ReportSpecificDates_Name = [ReportOnSpecificDates]
        ReportSpecificDates_Dates = 03/27/1980 00:00:00,08/15/1981 00:00:00
```csharp
using System;
using Models.Core;
using System.Collections.Generic;
using System.Text;
using Models.Soils;
using Models.PMF;
using Models;
using System.Xml.Serialization;
using APSIM.Shared.Utilities;

namespace Models
{
    [Serializable]
    public class Script : Model
    {
        [Link] Clock clock;
        [Link] Zone zone;
        [Link] Summary summary;

        [Separator("NOTE - all dates or date strings are entered with comma-separation and no spaces")]
        [Separator("NOTE - this component should be at the bottom of the list of Managers")]
        [Separator("   ")]
        [Separator("Example for reporting in particular days but the same days every year")]

        //ReportOnSpecificDaysEveryYear
        [Description("Name of the Report model for reporting on below dates every year: ")] 
        [Display(Type=DisplayType.Model, ModelType = typeof(Report.Report))]
        public Report.Report ReportEveryYear_Name { get; set; } 

        [Description("Enter one or more dates (as dd-mmm) for reporting : ")] 
        public string[] ReportEveryYear_Dates { get; set; } 

        [Separator("Example for reporting on absolute dates")]

        [Description("Name of the Report model for reporting on completely specified dates: ")] 
        [Display(Type=DisplayType.Model, ModelType = typeof(Report.Report))]
        public Report.Report ReportSpecificDates_Name { get; set; } 

        [Description("Enter one or more dates (as dd-mmm-yyyy) for reporting : ")] 
        public DateTime[] ReportSpecificDates_Dates { get; set; } 



        [EventSubscribe("DoManagementCalculations")]
        private void OnDoManagement(object sender, EventArgs e)
        {

            // example for reporting on irregular dates but the same dates every year
            if (ReportEveryYear_Dates != null)
                foreach (string ddMMM in ReportEveryYear_Dates)
                    if (DateUtilities.DatesEqual(ddMMM, clock.Today))
                        ReportEveryYear_Name.DoOutput();

            // example for reporting on fully-specified dates that are not necessarily the same dates every year
            if (ReportSpecificDates_Dates != null)
                foreach (DateTime ddMMMyy in ReportSpecificDates_Dates)
                    if (DateUtilities.Equals(ddMMMyy, clock.Today))
                        ReportSpecificDates_Name.DoOutput();




            /*if (ReportSpecificDates_Dates != null)
            {
                foreach (DateTime ddMMMyy in ReportSpecificDates_Dates)
                {
                    if (DateUtilities.Equals(ddMMMyy, clock.Today))
                    {
                        Models.Report.Report myReport = Apsim.Find(zone, ReportSpecificDates_Name) as Models.Report.Report;
                        if (myReport == null)
                            throw new Exception(string.Format("Unable to locate report {0}.", ReportSpecificDates_Name));
                        myReport.DoOutput();
                    }
                }
            }*/

        }
        
    }
}
```
      Fertiliser
      Irrigation
      MicroClimate: a_interception=0; b_interception=1; c_interception=0; d_interception=0; soil_albedo=0.3; SoilHeatFluxFraction=0.4; NightInterceptionFraction=0.5; ReferenceHeight=2
      Plant Wheat: CropType=Wheat; IsEnding=false; DaysAfterEnding=0
      SurfaceOrganicMatter: InitialResidueName=wheat_stubble; InitialResidueType=wheat; InitialResidueMass=500; InitialStandingFraction=0; InitialCPR=0; InitialCNR=100; FractionFaecesAdded=0.5
      Soil: ASCOrder=Vertosol; ASCSubOrder=Black; SoilType=Clay; Site=Norwin; NearestTown=Norwin; Region=Darling Downs and Granite Belt; State=Queensland; Country=Australia; NaturalVegetation=Qld. Bluegrass, possible Qld. Blue gum; ApsoilNumber=900; Latitude=-27.581836; Longitude=151.320206; LocationAccuracy=+/- 20m
        DataSource=CSIRO Sustainable Ecosystems, Toowoomba; Characteriesd as part of the GRDC funded project"Doing it better, doing it smarter, managing soil water in Australian agriculture' 2011
        Comments=OC, CLL for all crops estimated-based on Bongeen Mywybilla Soil No1
        Physical
          Thickness  BD       AirDry    LL15      DUL       SAT       KS
          150        1.01056  0.13025   0.2605    0.521     0.588655  20
          150        1.07146  0.198689  0.248362  0.496723  0.565677  20
          300        1.09394  0.28      0.28      0.488438  0.557193  20
          300        1.15861  0.28      0.28      0.480297  0.532787  20
          300        1.17301  0.28      0.28      0.471584  0.527354  20
          300        1.16287  0.28      0.28      0.457071  0.53118   20
          300        1.1875   0.28      0.28      0.452332  0.521888  20
          SoilCrop WheatSoil: LL=[0.261, 0.248, 0.28, 0.306, 0.36, 0.392, 0.446]; KL=[0.06, 0.06, 0.06, 0.04, 0.04, 0.02, 0.01]; XF=[1, 1, 1, 1, 1, 1, 1]
        SoilWater: SummerDate=1-Nov; SummerU=5; SummerCona=5; WinterDate=1-Apr; WinterU=5; WinterCona=5; DiffusConst=40; DiffusSlope=16; Salb=0.12; CN2Bare=73; CNRed=20; CNCov=0.8; max_pond=0; Thickness=[150, 150, 300, 300, 300, 300, 300]; SWCON=[0.3, 0.3, 0.3, 0.3, 0.3, 0.3, 0.3]; PrecipitationInterception=0
        Organic: FOMCNRatio=40
          Thickness  Carbon  SoilCNRatio  FBiom  FInert  FOM
          150        1.2     12           0.04   0.4     347.129
          150        0.96    12           0.02   0.6     270.344
          300        0.6     12           0.02   0.8     163.972
          300        0.3     12           0.02   1       99.4541
          300        0.18    12           0.01   1       60.322
          300        0.12    12           0.01   1       36.5871
          300        0.12    12           0.01   1       22.1912
        Chemical
          Thickness  NO3N  NH4N  PH
          150        1     0.1   8
          150        1     0.1   8
          300        1     0.1   8
          300        1     0.1   8
          300        1     0.1   8
          300        1     0.1   8
          300        1     0.1   8
        InitialWater: PercentMethod=1; FractionFull=1
        Sample InitialN: Thickness=[150, 150, 300, 300, 300, 300, 300]; SWUnits=Volumetric; OCUnits=Total; PHUnits=Water
        CERESSoilTemperature
        Nutrient
          DirectedGraphInfo={Nodes=[{Name=Inert, OutlineColour=Black}, {Name=SurfaceResidue, OutlineColour=Black}, {Name=FOMLignin, OutlineColour=Black}, {Name=FOMCellulose, OutlineColour=Black}, {Name=FOMCarbohydrate, OutlineColour=Black}, {Name=Microbial, OutlineColour=Black}, {Name=Humic, OutlineColour=Black}, {Name=Urea, OutlineColour=Black}, {Name=NO3, OutlineColour=Black}, {Name=NH4, OutlineColour=Black}, {Name=Atmosphere, OutlineColour=White}, {Name=PlantAvailableNO3, OutlineColour=Black}, {Name=PlantAvailableNH4, OutlineColour=Black}], Arcs=[{SourceName=SurfaceResidue, DestinationName=Microbial}, {SourceName=SurfaceResidue, DestinationName=Humic}, {SourceName=FOMLignin, DestinationName=Microbial}, {SourceName=FOMLignin, DestinationName=Humic}, {SourceName=FOMCellulose, DestinationName=Microbial}, {SourceName=FOMCellulose, DestinationName=Humic}, {SourceName=FOMCarbohydrate, DestinationName=Microbial}, {SourceName=FOMCarbohydrate, DestinationName=Humic}, {SourceName=Microbial, DestinationName=Microbial}, {SourceName=Microbial, DestinationName=Humic}, {SourceName=Humic, DestinationName=Microbial}, {SourceName=Urea, DestinationName=NH4}, {SourceName=NO3, DestinationName=Atmosphere}, {SourceName=NH4, DestinationName=NO3}]}
      Report ReportSimple: EventNames=[Clock].EndOfDay
        VariableNames:
          [Clock].Today
          [Weather].Rain as DailyRainfall
          [Wheat].Grain.Total.Wt
          [Sowing].Script.SowingDepth
          [Weather].MaxT as MaxT
          Min of [Weather].MaxT from [ReportSimple].DayAfterLastOutput to [Clock].Today as TestMaxT
      Report ReportOnEvents
        VariableNames:
          [Clock].Today
          [Wheat].AboveGroundLive.Wt
          Sum([Soil].Nutrient.MineralN)
          [Wheat].Phenology.CurrentPhaseName
          [Irrigation].IrrigationApplied
          [Fertiliser].NitrogenApplied
        EventNames:
          [Wheat].Sowing
          [Wheat].Flowering
          [Wheat].Harvesting
          [Wheat].Phenology.PhaseChanged
          [Irrigation].Irrigated
          [Fertiliser].Fertilised
      Report ReportOnSpecificDaysEveryYear
        VariableNames:
          [Clock].Today
          [Wheat].AboveGroundLive.Wt
      Report ReportOnSpecificDates
        VariableNames:
          [Clock].Today
          [Wheat].AboveGroundLive.Wt
      Report ReportArrays: EventNames=[Clock].EndOfDay
        VariableNames:
          [Clock].Today
          Sum([Soil].Thickness[1:3]) as DepthToBottomOfLayer3
          Sum([Soil].SoilWater.SWmm) as TotalWaterStored
          Sum([Soil].SoilWater.SWmm[1:2]) as WaterStoredTop2Layers
          Sum([Soil].SoilWater.SWmm[1:3]) as WaterStoredTop3Layers
          Sum([Soil].SoilWater.SWmm[4:]) as WaterStoredLayer4AndBelow
          Sum([Soil].SoilWater.SWmm[:6]) as WaterStoredDowntoLayer6
          Mean([Soil].Nutrient.NO3.ppm[1:4]) as MeanNO3ppmTop4Layers
          Min([Soil].Nutrient.NO3.ppm[1:4]) as MinNO3ppmTop4Layers
          Max([Soil].Nutrient.NO3.ppm[1:4]) as MaxNO3ppmTop4Layers
          Sum([Soil].Nutrient.Urea.kgha[1:3] + [Soil].Nutrient.NH4.kgha[1:3] + [Soil].Nutrient.NO3.kgha[1:3]) as MineralN
          Sum([Soil].Nutrient.Urea.kgha[1:3] + [Soil].Nutrient.NH4.kgha[1:3] + [Soil].Nutrient.NO3.kgha[1:3]) * 1000 / Sum([Soil].Thickness[1:3] ) as KgMinN_PerSoilMeter
      Report ReportDaily: EventNames=[Clock].EndOfDay
        VariableNames:
          [Clock].Today
          Sum of [Weather].MaxT from [ReportDaily].DayAfterLastOutput to [Clock].Today as SumDailyMaxT
          Mean of [Weather].MaxT from [ReportDaily].DayAfterLastOutput to [Clock].Today as MeanDailyMaxT
          Min of [Weather].MaxT from [ReportDaily].DayAfterLastOutput to [Clock].Today as MinDailyMaxT
          Max of [Weather].MaxT from [ReportDaily].DayAfterLastOutput to [Clock].Today as MaxDailyMaxT
          First of [Weather].MaxT from [ReportDaily].DayAfterLastOutput to [Clock].Today as FirstDailyMaxT
          Last of [Weather].MaxT from [ReportDaily].DayAfterLastOutput to [Clock].Today as LastDailyMaxT
          Diff of [Weather].MaxT from [ReportDaily].DayAfterLastOutput to [Clock].Today as DiffDailyMaxT
      Report ReportWeekly: EventNames=[Clock].EndOfWeek
        VariableNames:
          [Clock].Today
          Sum of [Weather].MaxT from [ReportWeekly].DayAfterLastOutput to [Clock].Today as SumWeeklyMaxT
          Mean of [Weather].MaxT from [ReportWeekly].DayAfterLastOutput to [Clock].Today as MeanWeeklyMaxT
          Min of [Weather].MaxT from [ReportWeekly].DayAfterLastOutput to [Clock].Today as MinWeeklyMaxT
          Max of [Weather].MaxT from [ReportWeekly].DayAfterLastOutput to [Clock].Today as MaxWeeklyMaxT
          First of [Weather].MaxT from [ReportWeekly].DayAfterLastOutput to [Clock].Today as FirstWeeklyMaxT
          Last of [Weather].MaxT from [ReportWeekly].DayAfterLastOutput to [Clock].Today as LastWeeklyMaxT
          Diff of [Weather].MaxT from [ReportWeekly].DayAfterLastOutput to [Clock].Today as DiffWeeklyMaxT
      Report ReportMonthly: EventNames=[Clock].EndOfMonth
        VariableNames:
          [Clock].Today
          Sum of [Weather].MaxT from [ReportMonthly].DayAfterLastOutput to [Clock].Today as SumMonthlyMaxT
          Mean of [Weather].MaxT from [ReportMonthly].DayAfterLastOutput to [Clock].Today as MeanMonthlyMaxT
          Min of [Weather].MaxT from [ReportMonthly].DayAfterLastOutput to [Clock].Today as MinMonthlyMaxT
          Max of [Weather].MaxT from [ReportMonthly].DayAfterLastOutput to [Clock].Today as MaxMonthlyMaxT
          First of [Weather].MaxT from [ReportMonthly].DayAfterLastOutput to [Clock].Today as FirstMonthlyMaxT
          Last of [Weather].MaxT from [ReportMonthly].DayAfterLastOutput to [Clock].Today as LastMonthlyMaxT
          Diff of [Weather].MaxT from [ReportMonthly].DayAfterLastOutput to [Clock].Today as DiffMonthlyMaxT
      Report ReportYearly: EventNames=[Clock].EndOfYear
        VariableNames:
          [Clock].Today
          Sum of [Weather].MaxT from [ReportYearly].DayAfterLastOutput to [Clock].Today as SumYearlyMaxT
          Mean of [Weather].MaxT from [ReportYearly].DayAfterLastOutput to [Clock].Today as MeanYearlyMaxT
          Min of [Weather].MaxT from [ReportYearly].DayAfterLastOutput to [Clock].Today as MinYearlyMaxT
          Max of [Weather].MaxT from [ReportYearly].DayAfterLastOutput to [Clock].Today as MaxYearlyMaxT
          First of [Weather].MaxT from [ReportYearly].DayAfterLastOutput to [Clock].Today as FirstYearlyMaxT
          Last of [Weather].MaxT from [ReportYearly].DayAfterLastOutput to [Clock].Today as LastYearlyMaxT
          Diff of [Weather].MaxT from [ReportYearly].DayAfterLastOutput to [Clock].Today as DiffYearlyMaxT
      Report ReportSimulation: EventNames=[Clock].EndOfSimulation
        VariableNames:
          [Clock].Today
          Sum of [Weather].MaxT from [ReportSimulation].DayAfterLastOutput to [Clock].Today as SumSimulationMaxT
          Mean of [Weather].MaxT from [ReportSimulation].DayAfterLastOutput to [Clock].Today as MeanSimulationMaxT
          Min of [Weather].MaxT from [ReportSimulation].DayAfterLastOutput to [Clock].Today as MinSimulationMaxT
          Max of [Weather].MaxT from [ReportSimulation].DayAfterLastOutput to [Clock].Today as MaxSimulationMaxT
          First of [Weather].MaxT from [ReportSimulation].DayAfterLastOutput to [Clock].Today as FirstSimulationMaxT
          Last of [Weather].MaxT from [ReportSimulation].DayAfterLastOutput to [Clock].Today as LastSimulationMaxT
          Diff of [Weather].MaxT from [ReportSimulation].DayAfterLastOutput to [Clock].Today as DiffSimulationMaxT
  Folder Reporting Basics
    Memo Reporting Basics
      Setting up outputs from a simulation requires describing **what** to output and **when** that should be done.

      ## Properties - setting up what should be reported

      Figure 1 shows a screen capture of a simple report. The upper box (Properties) holds descriptions of what should be reported. The general syntax is:

      			[Model].Variable
      The first part, "[Model]" just above, gives the name of a model in the simulation. Models are almost any component in the simulation - e.g. Clock, Weather, Wheat, Irrigation - including Manager scripts (although these are a slightly special case and more on that below). The name of the model must be in square brackets. As with Manager scripts, Properties uses Intellisense to assist with constructing the output descriptors. For example, see row 1 of Figure 1. After typing "[Clock]" once a "." is typed a drop-down list of possible variables will appear as hints and in Figure 1 the choice from the list was "Today" which gives the date of the simulation output.

      *Note that model and variable names are case-sensitive. Capitalisation in the right places is important.*

      The component "ReportSimple" shows four output examples (see also below). The second row (see also below) shows an example of relabelling the output (the "as DairyRainfall" text) - this simply allows the user to give a more relevant label for the output in the output file.

      			[Weather].Rain as DailyRainfall

      The third row shows that it may be necessary to work through several layers to get to the output wanted. In each case a "." after the variable name gives a list with hints for outputs.

      			[Wheat].Grain.Total.Wt

      The fourth row (also below) shows the special case of reporting an output from a Manager script. The first part ("[SowingRule]") is the name of the Manager script (so the output text needs to say current with any name changes you might make). Outputs from Managers always need a ".Script" before Intellisense will show the possible outputs.

      			[SowingRule].Script.SowingDepth

      ## Reporting frequency - setting up when reports should happen

      Also needed is a specification of *when* an output should be made. The instruction for when to report is in the form of:

      			[Model].Event
      An Event is something that happens, like a stage of the day or a management action. The most-used example of a reporting frequency is:

      			[Clock].EndOfDay
      and this creates an output for every "EndOfDay" event - "EndOfDay" is an event created by Clock every day after all the models have done their calculations. Any (almost) event can be used to control the frequency of reporting such as:

      			[Wheat].Sowing
      			[Wheat].Flowering
      			[Wheat].Harvesting
      			[Wheat].PlantEnding
      			[Irrigation].Irrigated
      			[Fertiliser].Fertilised
      where “Wheat” might be any crop. This also shows that multiple triggers for reporting can be used.

      It is worth noting that when an event is used to trigger reporting, the output happens immediately rather than at the end of the simulation day. If you are getting strange outputs then consider this as a possible reason. To understand more about what order models do their calculations see https://apsimnextgeneration.netlify.com/development.

      ## Reporting at irregular intervals or specific dates

      If reporting is needed for particular days (e.g. to compare against measurements in an experiment) a combination of a Manager and a Report component will do the trick. An example of such a Manager (**ReportHelper**) and two Report components (**ReportOnSpecificDaysEveryYear** and **ReportOnSpecificDates**) are included in this example. Note that when using a Manager to control reporting, the Report frequency in the Report component should be left blank.

      [Note that an Operations component could also be used to trigger irregular reporting dates.]
  Folder Dealing with outputs that have layers
    Memo Reporting Arrays
      Several of the outputs from APSIM are arrays - water content in the soil layers is a good example of this - and there are some features that make reporting arrays easier in APSIM.

      To report all elements of an array, the syntax is the same as reporting a single variable. See for example in Row 2 of "ReportArrays the text

      			[Soil].SoilWater.SWmm
      produces one column of output for each element (soil layer) in the array. When a particular layer is wanted then specify that in square brackets so the "[1]" is the top (closest to the soil surface) layer. For example,

      			[Soil].SoilWater.SWmm[1] as TopLayerWater_mm

      More often some sort of aggregation is in the array is wanted and for this it is necessary to specify both which elements of the array are to be aggregated and what type of aggregation is wanted.

      There are four options for specifying how the array elements should be aggregated - Sum, Mean, Min and Max - the meaning of these is self-evident. These are applied to the array as, for example Mean(x) where the x is the output to be averaged. Use round brackets, capitalise the aggregation type and no spaces.

      For specifying how the aggregation is to work there are several options. Giving no layer information at all includes all of the array. A range is specified as, for example [3:6] for the third to sixth (inclusive, here meaning four layers) layers. Giving the colon but no numerical value means from the first (e.g. [:5]) or to the last (e.g. [2:]) elements. Report will not indicate the depth of the layers but the user can either get this information from the Soil input or can output the data using [Soil].Thickness which is an array giving the thickness of each layer in mm.

      Some examples of possible array outputs to show the syntax are:

      			Sum([Soil].Thickness[1:3]) as DepthToBottomOfLayer3
      			Sum([Soil].SoilWater.SWmm) as TotalWaterStored
      			Sum([Soil].SoilWater.SWmm[1:2]) as WaterStoredTop2Layers
      			Sum([Soil].SoilWater.SWmm[1:3]) as WaterStoredTop3Layers
      			Sum([Soil].SoilWater.SWmm[4:]) as WaterStoredLayer4AndBelow
      			Sum([Soil].SoilWater.SWmm[:6]) as WaterStoredDowntoLayer6
      			Mean([Soil].Nutrient.NO3.ppm[1:4]) as MeanNO3ppmTop4Layers
      			Min([Soil].Nutrient.NO3.ppm[1:4]) as MinNO3ppmTop4Layers
      			Max([Soil].Nutrient.NO3.ppm[1:4]) as MaxNO3ppmTop4Layers

      Simple, element-by-element, array operations can be included in the specification. For example

      			[Soil].Nutrient.Urea.kgha + [Soil].Nutrient.NH4.kgha + [Soil].Nutrient.NO3.kgha
      will produce one column of data for each soil layer with the total of the amount of N as Urea, NH4 and NO3. Inserting

      			Sum([Soil].Nutrient.Urea.kgha[1:3] + [Soil].Nutrient.NH4.kgha[1:3] + [Soil].Nutrient.NO3.kgha[1:3]) as MineralN
      will give a single column of data with the total of Urea-N, NH4-N and NO3-N dfrom the surface the the bottom of the third layer. These expressions can get more complex as in:

      			Sum([Soil].Nutrient.Urea.kgha[1:3] + [Soil].Nutrient.NH4.kgha[1:3] + [Soil].Nutrient.NO3.kgha[1:3]) * 1000 / Sum([Soil].Thickness[1:3] ) as KgMinN_PerSoilMeter
      which would give s single (somewhat nonsensical) output of the accumulation in mineral N with depth in the soil.
  Folder Reporting at Intervals Beyond Every Day
    Memo Reporting that is Aggregated in Time
      ***Note well** – reporting at aggregations other than every day can become complex. It is recommended that the results be critically evaluated to ensure that the reporting specified is as intended.*

      APSIM allows reporting at various intervals. Several of these methods have been described above. In addition to the usual [Clock].EndOfDay for daily reporting, [Clock] also has events of EndOfWeek, EndOfMonth, EndOfYear and EndOfSimulation. When the reporting is not every day then it is necessary to consider what the aggregation of the output should be. Some variables would usually be reported as their value on the day – many state variables (e.g. plant biomass) are like this. Others are almost always wanted to be summed over the interval since the last report – drainage and evaporation are good examples here.

      APSIM provides several ways to construct the aggregations. Not all the aggregations will be sensible for all outputs and it is up to the user to ensure the sensibility of the instructions to Report. For example, it makes no physical sense to sum the biomass of a plant in a monthly aggregation. It would make sense to report the value at the end of the month or to report the increase (difference) in biomass from the start to the end and it might make sense to report an average biomass. These issues must be considered when constructing more complex Report specifications. The general syntax of aggregated reporting is:

      			AggregationType of [Model].Variable from Start to End as Label

      The new elements here are *AggregationType*, *Start* and *End*.

      ##AggregationType
      AggregationType can be any of:

      -	Sum of

      -	Mean of

      -	Min of

      -	Max of

      -	First of

      -	Last of

      -	Diff of

      Most of these are self-evident. First and Last are chronological values. Diff is the increase in the output variable over the reporting interval – if the variable decreases then it will have a negative value.

      ##Start
      The most useful form of *Start* is *[ReportName].DateOfLastOutput* where the first part is the name of the current Report component. *DateOfLastOutput* is pretty much as stated. Other *Start* constructs might be a general, e.g. *1-jan*, or specific, e.g. *1-jan-1982*, date. *Start* can also be an event, e.g. *[Wheat].sowing* or *[Clock].StartOfYear*. When *Start* is a Clock or Report event the aggregation always starts at the start of the day. For events created by crop or other models the event can happen at any point of the day and it is not always clear without careful examination if the current-day calculations and updates will be included or excluded. This is user-beware.

      ##End
      *[Clock].Today* is the most useful *End* specification. This means that the end of the aggregation will be controlled by the Report frequency. *End* can also be an event, e.g. *[Wheat].Harvesting* or a general or specific date. As with *Start* and events, treat these with caution. Always consider the interaction between the aggregation interval and the report frequency. For example if the report frequency is *[Clock].EndOfMonth*:

      			Sum of [Weather].Rain from [Report].DateOfLastOutput to [Clock].Today
      will produce a monthly rainfall total while

      			Sum of [Weather].Rain from 1-jan to [Clock].Today
      will produce a cumulative rainfall as the months of the year progress and the accumulation will reset again on the next 1-Jan.

      ##Some examples
      The figures below show some aggregation examples of daily, weekly, monthly and annual aggregation reporting maximum temperature in various ways. Note that an aggregation to the end of the simulation is also possible. See the accompanying example *Report.apsimx* for details of these aggregations.
  Folder More Reporting Examples
    Folder Perennial Crop Example
      Memo
        The simulation in this section (titled "Annual Reporting In June") is a multi-year pasture cutting trial simulation. The Report components provide some examples of ways to get useful outputs from a simulation. See the generated documentation but also look at the output specifications in the Reports components.

        Note that in the documentation, many of the output specifications are broken over two or more lines. This is only to show then text in the generated PDF. In a Report component, all the text would be on a single line.
      Simulation Annual Reporting In June
        Clock: Start=1980-07-01; End=1989-06-30
        Weather: FileName=%root%\Examples\WeatherFiles\lincoln.met
        SoilArbitrator
        Summary
        Zone Field: Area=1; Slope=0; AspectAngle=0; Altitude=50
          Manager CutRotation
            AllowControl = yes
            CutRotationStartDate = 01/01/1900 00:00:00
            CutRotationEndDate = 12/31/2100 00:00:00
            IntervalType = FixedInterval
            CutInterval = 21
            DurationOfCut = 1
            RemoveAmountType = ResidualDM
            AmountGiven = 1000
            DMRemoveType = BasedOnDigestibility
            FractionN2Remove = 0.75
            ReturnType = AsDungUrine
            NDungType = DefineProportion
            ProportionN2Dung = 0.4
            CNRatioDung = 0
            UrineDepth = 250
```csharp
// Defoliates AgPasture on a regular rotation or one-off via a schedule
// currenty defoliates the amount specified by spreading evenly over the specified period

using System;
using System.Collections.Generic;
using System.Xml.Serialization;
using Models.Core;
using Models.PMF;
using Models.Soils;
using APSIM.Shared.Utilities;
using Models.Interfaces;

namespace Models
{
    [Serializable]
    public class Script : Model
    {
        // - Links to APSIM models
        [Link] Zone myZone;
        [Link] Clock Clock;
        [Link] Fertiliser fertiliser;
        [Link(ByName = true)] ISolute no3;
        [Link] Soil mySoil;
        [Link] ISummary summary = null;
        
        List<AgPasture.PastureSpecies> Pasture = new List<AgPasture.PastureSpecies>();
        
        // - Paramters for this manager
        [Description("Allow this manager to control defoliation? ")]
        public yesnoType AllowControl { get; set; }
        [Description("Date to begin the rotation: ")]
        public DateTime CutRotationStartDate { get; set; }
        [Description("Date to finish the rotation: ")]
        public DateTime CutRotationEndDate { get; set; }
        [Description("How the interval is defined: ")]
        public rotationIntervalTypes IntervalType { get; set; }
        [Description("Rotation interval (days): ")]
        public int CutInterval { get; set; }
        [Description("Duration of each event (days): ")]
        public int DurationOfCut { get; set; }
        [Description("What amount is being defined: ")]
        public removeAmountTypes RemoveAmountType { get; set; }
        [Description("Amount to use (kg/ha): ")]
        public double AmountGiven { get; set; }
        [Description("How much of DM is removed from the field: ")]
        public removeDMTypes DMRemoveType { get; set; }
        [Description("Fraction of N that is removed from the field (0-1): ")]
        public double FractionN2Remove { get; set; }
        [Description("How defoliated material is returned to the field? ")]
        public returnTypes ReturnType { get; set; }
        [Description("How the partition of N to dung and urine are defined:")]
        public dungNContentTypes NDungType { get; set; }
        [Description("Proportion of returned N that goes to dung (0-1): ")]
        public double ProportionN2Dung { get; set; }
        [Description("The C:N of dung (typically around 20): ")]
        public double CNRatioDung { get; set; }
        [Description("Depth down to which urine is applied (mm): ")]
        public double UrineDepth { get; set; }

        // - Outputs from this manager
        [XmlIgnore][Units("g/m2")]// Description: Pasture DM defoliated today
        public double DefoliatedWt { get; set; }
        [XmlIgnore][Units("g/m2")]// Description: Pasture N defoliate today
        public double DefoliatedN { get; set; }
        [XmlIgnore][Units("g/m2")]// Description: Pasture DM harvested today
        public double HarvestedWt { get; set; }
        [XmlIgnore][Units("g/m2")]// Description: Pasture N harvested today
        public double HarvestedN { get; set; }
        [XmlIgnore][Units("g/m2")]// Description: Pasture DM removed from the field
        public double RemovedWt { get; set; }
        [XmlIgnore][Units("g/m2")]// Description: Pasture N removed from the field
        public double RemovedN { get; set; }
        [XmlIgnore][Units("g/m2")]// Description: Residue DM returned to the field
        public double ReturnedWt { get; set; }
        [XmlIgnore][Units("g/m2")]// Description: Residue N returned to the field
        public double ReturnedN { get; set; }
        [XmlIgnore][Units("g/m2")]// Description: Harvested N returned as dung (SurfaceOM)
        public double NReturnedInDung { get; set; }
        [XmlIgnore][Units("g/m2")]// Description: Harvested N returned as urine (urea)
        public double NReturnedInUrine { get; set; }
        [XmlIgnore][Units("day")]// Description: Number of days after last defoliation
        public int DaysAfterCut { get; set; }
        [XmlIgnore][Units("g/m2")]// Description: Total standing DM (Leaf + Stem/Sheath) before cut
        public double PreHarvestDM { get; set; }
        [XmlIgnore][Units("g/m2")]// Description: Total standing DM (Leaf + Stem/Sheath) after cut
        public double PostHarvestDM { get; set; }
        
        // - Internal variables
        // fraction of harvested Dm to actually remove from field
        private double fractionDM2Remove = 1.0;
        // number of days for each defoliation event
        private int cuttingDuration = 0;
        // counter for day within each defoliation
        private int daysCutting = 0;
        // total existing DM harvestable
        private double existingDM;
        // total herbage to remove in g/m2 per day
        private double herbageToRemove;
        // type of DM amount (ResidualDM or DMToRemove)
        private string amountType;
        // auxiliary flag for defoliation
        private bool aCutHasHappened = false;
        // fraction of urine that is applied to each layer
        private double[] fractionUrine;
        // number of layer in the soil
        private int nLayers;

        // - Event to add residue or dung to surface OM
        public event BiomassRemovedDelegate BiomassRemoved;

        [EventSubscribe("Commencing")]
        private void OnSimulationCommencing(object sender, EventArgs e)
        {
            foreach (AgPasture.PastureSpecies species in Apsim.Children(myZone, typeof(AgPasture.PastureSpecies)))
                Pasture.Add(species);

            // reset variables
            DaysAfterCut = 0;
            resetVariables();
            cuttingDuration = DurationOfCut;
            
            // get the type of amount given
            if (RemoveAmountType == removeAmountTypes.ResidualDM)
                amountType = "SetResidueAmount";
            else
                amountType = "SetRemoveAmount";

            // make sure that rotation start when startDate < simulationStartDay
            if ((Clock.Today > CutRotationStartDate) && (Clock.Today < CutRotationEndDate))
                CutRotationStartDate = Clock.Today;
                
            // set the fraction of urine for each layer
            nLayers = mySoil.Thickness.Length;
            fractionUrine = new double[nLayers];
            double soilDepth = 0.0;
            double distFactor = 1.5;
            if (ReturnType == returnTypes.AsDungUrine)
            {
                double atZ0;
                double atZ1;
                double totalProp = UrineDepth * Math.Pow(1.0, distFactor) / (distFactor + 1.0);
                
                atZ1 = (UrineDepth - soilDepth) * Math.Pow(1.0 - soilDepth / UrineDepth, distFactor) / (distFactor + 1.0);
                for (int z = 0; z < nLayers; z++)
                {
                    atZ0 = atZ1;
                    soilDepth += mySoil.Thickness[z];
                    atZ1 = (UrineDepth - soilDepth) * Math.Pow(1.0 - soilDepth / UrineDepth, distFactor) / (distFactor + 1);
                    if (1.0 - (soilDepth / UrineDepth) < 0.0)
                        atZ1 = 0;
                    fractionUrine[z] = (atZ0 - atZ1) / totalProp;
                }
            }
        }
        
        [EventSubscribe("DoManagement")]
        private void OnDoManagement(object sender, EventArgs e)
        {
            // Check whether defoliation is allowed at all
            if (AllowControl == yesnoType.yes)
            {
                // Check whether defoliation can start
                if ((Clock.Today >= CutRotationStartDate) && (Clock.Today <= CutRotationEndDate))
                {
                    if (Clock.Today == CutRotationStartDate)
                        DaysAfterCut = CutInterval;
    
                    // Check whether we should start a defoliation
                    if ((Pasture[0].IsAlive) && (DaysAfterCut >= (CutInterval - 1)))
                        StartDefoliation(AmountGiven, amountType, DurationOfCut);
                }
            }
            //// Note: Only the code above should be limited by 'AllowControl'. So the rest of the code
            ////  can be used by being called from another manager or a schedulle thingy


            // Check whether we need to continue cutting
            if ((daysCutting > 0) && (daysCutting < cuttingDuration))
            {
                // reset outputs
                resetVariables();

                defoliatePasture(herbageToRemove);
                if (ReturnType == returnTypes.AsResidue)
                    returnResidues();
                else
                    returnExcreta();
                daysCutting += 1;
                if (daysCutting == cuttingDuration)
                {
                    PostHarvestDM = 0.0;
                    foreach (AgPasture.PastureSpecies species in Pasture)
                        PostHarvestDM += species.StandingHerbageWt;
                }
            }

            // reset outputs
            if (daysCutting < 0)
            {
                resetVariables();
                daysCutting = 0;
            }
        }

        [EventSubscribe("DoManagementCalculations")]
        private void OnDoManagementCalculations(object sender, EventArgs e)
        {
            // Check whether a cutting has finished
            if (daysCutting == cuttingDuration)
            {
                aCutHasHappened = true;
                daysCutting = -1;
            }

            // Increase the counter for days after cutting
            if (aCutHasHappened && (daysCutting == 0))
                DaysAfterCut += 1;
        }

        // Resets the values of all outputs
        private void resetVariables()
        {
            DefoliatedWt = 0.0;
            DefoliatedN = 0.0;
            HarvestedWt = 0.0;
            HarvestedN = 0.0;
            RemovedWt = 0.0;
            RemovedN = 0.0;
            ReturnedWt = 0.0;
            ReturnedN = 0.0;
            NReturnedInDung = 0.0;
            NReturnedInUrine = 0.0;
        }

        // Description: Perform the basic calculations for defoliation
        public void StartDefoliation(double amountDM, string amountType, int duration)
        {
            // Get the existing plant amount
            existingDM = 0.0;
            PreHarvestDM = 0.0;
            foreach (AgPasture.PastureSpecies species in Pasture)
            {
                PreHarvestDM += species.StandingHerbageWt;
                existingDM += species.HarvestableWt;
            }
            
            // Check the amount to remove and print some info
            if ((amountType == "SetRemoveAmount") && (existingDM >= amountDM / duration))
            {
                summary.WriteMessage(this, "   Defoliating " + (10 * amountDM).ToString("#0.0") + "kg/ha over " + duration + " days");
                herbageToRemove = amountDM / duration;
            }
            else if ((amountType == "SetResidueAmount") && (existingDM >= amountDM))
            {
                summary.WriteMessage(this, "   Defoliating down to approximately " + (10 * amountDM).ToString("#0.0") + "kg/ha over " + duration + " days");
                herbageToRemove = (PreHarvestDM - amountDM) / duration;
            }
            else
            {
                summary.WriteMessage(this, "   Defoliation will not happend because there is not enough plant material");
                if (IntervalType == rotationIntervalTypes.FixedInterval)
                    DaysAfterCut = -duration;
                return;
            }

            // Start defoliation
            cuttingDuration = duration;
            defoliatePasture(herbageToRemove);
            if (ReturnType == returnTypes.AsResidue)
                returnResidues();
            else
                returnExcreta();
                
            daysCutting = 1;
            DaysAfterCut = 0;
            if (daysCutting == cuttingDuration)
            {
                PostHarvestDM = 0.0;
                foreach (AgPasture.PastureSpecies species in Pasture)
                    PostHarvestDM += species.StandingHerbageWt;
            }
        }

        // Do the DM removal
        private void defoliatePasture(double removeAmount)
        {
            // Remove a proportion of required DM from each species
            DefoliatedWt = 0.0;
            DefoliatedN = 0.0;
            foreach (AgPasture.PastureSpecies species in Pasture)
            {
                double amountToRemove = removeAmount * species.HarvestableWt / existingDM;
                species.Graze(amount: amountToRemove, type: "SetRemoveAmount");
                DefoliatedWt += species.HarvestedWt;
                DefoliatedN += species.HarvestedN;
            }
            
            // total harvested is equal total defoliated, for now
            HarvestedWt = DefoliatedWt;
            HarvestedN = DefoliatedN;

            // get amounts actually removed from field and that to be returned (dung/urine)
            if (DMRemoveType == removeDMTypes.RemoveAll)
                fractionDM2Remove = 1.0;
            else if (DMRemoveType == removeDMTypes.RemoveNone)
                fractionDM2Remove = 0.0;
            else
            {
                fractionDM2Remove = 0.0;
                foreach (AgPasture.PastureSpecies species in Pasture)
                    fractionDM2Remove += species.HarvestedDigestibility * species.HarvestedWt;
                fractionDM2Remove /= removeAmount;
            }
            
            RemovedWt = HarvestedWt * fractionDM2Remove;
            RemovedN = HarvestedN * FractionN2Remove;
            ReturnedWt = HarvestedWt - RemovedWt;
            ReturnedN = HarvestedN - RemovedN;

            if (ReturnType == returnTypes.AsDungUrine)
            {
                if (NDungType == dungNContentTypes.DefineProportion)
                    NReturnedInDung = ReturnedN * ProportionN2Dung;
                else
                    NReturnedInDung = Math.Min(ReturnedN, ReturnedWt * 0.4 / CNRatioDung);
                NReturnedInUrine = ReturnedN - NReturnedInDung;
            }
            else
            {
                NReturnedInDung = 0.0;
                NReturnedInUrine = 0.0;
            }
        }
        
        // Return dung and urine
        private void returnExcreta()
        {
            if ((ReturnedWt > 0.0) || (NReturnedInDung > 0.0))
            {
                PMF.BiomassRemovedType BiomassDung = new PMF.BiomassRemovedType();
                string[] type = new string[] { "RuminantDung_PastureFed" };
                float[] dltdm = new float[] { (Single)ReturnedWt };
                float[] dltn = new float[] { (Single)NReturnedInDung };
                float[] dltp = new float[] { 0 };
                float[] fraction = new float[] { 1 };     // fraction is always 1.0 here

                BiomassDung.crop_type = "RuminantDung_PastureFed";
                BiomassDung.dm_type = type;
                BiomassDung.dlt_crop_dm = dltdm;
                BiomassDung.dlt_dm_n = dltn;
                BiomassDung.dlt_dm_p = dltp;
                BiomassDung.fraction_to_residue = fraction;
                BiomassRemoved.Invoke(BiomassDung);
            }

            if (NReturnedInUrine > 0.0)
            {
                double[] myUrineDeposition = new double[nLayers];
                for (int z = 0; z < nLayers; z++)
                    myUrineDeposition[z] = NReturnedInUrine * fractionUrine[z];

                no3.AddKgHaDelta(SoluteSetterType.Fertiliser, myUrineDeposition);
                //fertiliser.Apply(NReturnedInUrine * 10, Fertiliser.Types.UreaN, 1.0);
            }
        }

        // Return pasture residues
        private void returnResidues()
        {
            if ((ReturnedWt > 0.0) || (ReturnedN > 0.0))
            {
                PMF.BiomassRemovedType BiomassDung = new PMF.BiomassRemovedType();
                string[] type = new string[] { "Grass" };
                float[] dltdm = new float[] { (Single)ReturnedWt };
                float[] dltn = new float[] { (Single)ReturnedN };
                float[] dltp = new float[] { 0 };
                float[] fraction = new float[] { 1 };     // fraction is always 1.0 here

                BiomassDung.crop_type = "Grass";
                BiomassDung.dm_type = type;
                BiomassDung.dlt_crop_dm = dltdm;
                BiomassDung.dlt_dm_n = dltn;
                BiomassDung.dlt_dm_p = dltp;
                BiomassDung.fraction_to_residue = fraction;
                BiomassRemoved.Invoke(BiomassDung);
            }
        }
        
        // Auxiliary bits and pieces  - - - - - - - - - - - - - - - - - - - - - - - -  - - - - -  - -

        public enum yesnoType
        {
            /// <summary>a positive answer</summary>
            yes,
            /// <summary>a negative answer</summary>
            no
        }

        public enum removeAmountTypes
        {
            /// <summary>Setting DM amount to remove</summary>
            DMToRemove,
            /// <summary>Setting residual DM amount</summary>
            ResidualDM
        }

        public enum rotationIntervalTypes
        {
            /// <summary>Setting a fixed interval</summary>
            FixedInterval,
            /// <summary>Setting a target (minimum) inteval</summary>
            TargetInterval
        }

        public enum removeDMTypes
        {
            /// <summary>Remove all DM</summary>
            RemoveAll,
            /// <summary>Remove no DM</summary>
            RemoveNone,
            /// <summary>Remove a fraction based on digestibility</summary>
            BasedOnDigestibility
        }
        
        public enum returnTypes
        {
            /// <summary>Return plant material as residue</summary>
            AsResidue,
            /// <summary>Return meterial as dung and urine</summary>
            AsDungUrine
        }

        public enum dungNContentTypes
        {
            /// <summary>Define the proportion of N returned as dung</summary>
            DefineProportion,
            /// <summary>Define the C:N of dung</summary>
            DefineCNratio,
        }
    }
}
```
          Manager AutomaticFertiliser
            AllowFertiliser = yes
            Depth2SoilN = 500
            CriticalSoilN = 5
            FertNAmount = 25
            FertType = UreaN
            FertApplicationDepth = 1
            FertMinimumDays = 15
```csharp
using Models.Interfaces;
using System.Xml.Serialization;
using APSIM.Shared.Utilities;
using Models.Soils;
using Models.PMF;
using Models.Core;
using System;

namespace Models
{
    [Serializable]
    public class Script : Model
    {
        [Link] private Clock Clock;
        [Link] private Fertiliser fertiliser;
        [Link] private ISummary summary;
        [Link] private Soil Soil;
        private DateTime lastApplicationDate;
        private bool fertiliserIsAllowed;
        private int nLayers;
        [Link(ByName = true)]
        private ISolute NO3;
        [Link(ByName = true)]
        private ISolute NH4;
        [Link(ByName = true)]
        private ISolute Urea;

        //User inputs from properties tab
        [Description("Turn ferliser applications on? ")]
        public yesnoType AllowFertiliser { get; set; }
        
        [Description("Depth to calculate available soil N (mm): ")]
        public double Depth2SoilN { get; set; }

        [Description("Minimum available N, triggers an application (kgN/ha): ")]
        public double CriticalSoilN { get; set; }

        [Description("Amount of N fertiliser for each application (kgN/ha): ")]
        public double FertNAmount { get; set; }

        [Description("Type of N fertiliser to apply: ")]
        public Fertiliser.Types FertType { get; set; }

        [Description("Depth at which to apply the fertiliser (mm): ")]
        public double FertApplicationDepth { get; set; }
       
        [Description("Minimum period between applications (days): ")]
        public double FertMinimumDays { get; set; }
       
        public enum yesnoType
        {
            /// <summary>a positive answer</summary>
            yes,
            /// <summary>a negative answer</summary>
            no
        }

        [XmlIgnore] public double TopMineralN { get; set; }
        

        [EventSubscribe("StartOfSimulation")]
        private void OnStartOfSimulation(object sender, EventArgs e)
        {
            fertiliserIsAllowed = (AllowFertiliser == yesnoType.yes);
            nLayers = Soil.Thickness.Length;
        }

        [EventSubscribe("DoManagement")]
        private void OnDoManagement(object sender, EventArgs e)
        {
            double daysSinceLastApplication = (Clock.Today - lastApplicationDate).TotalDays;
            
            // get the N stored in the soil
            double depthFromSurface = 0.0;
            double fracLayer = 0.0;
            TopMineralN = 0.0;
            for (int layer = 0; layer < nLayers; layer++)
            {
                fracLayer = Math.Min(1.0, (Depth2SoilN - depthFromSurface) / Soil.Thickness[layer]);
                TopMineralN += (NO3.kgha[layer]
                + NH4.kgha[layer]
                + Urea.kgha[layer])
                * fracLayer;
                depthFromSurface += Soil.Thickness[layer];
                if (depthFromSurface >= Depth2SoilN)
                    layer = nLayers;
            }

            if (fertiliserIsAllowed && (daysSinceLastApplication >= FertMinimumDays) && (TopMineralN <= CriticalSoilN))
            {
                fertiliser.Apply(FertNAmount, FertType, FertApplicationDepth);
                lastApplicationDate = Clock.Today;
            }
        }
    }
}
```
          Manager FertiliseOnFixedDates
            EachYear = True
            Dates = 5-jan,5-feb,5-mar,5-apr,5-aug,5-sep,5-oct,5-nov,5-dec
            UseCritNThreshold = False
            CritNThreshold = 50
            CritNDepth = 75
            Depth = 50
            Amount = 25
            FertiliserType = UreaN
```csharp
using System;
using Models.Core;
using Models.Soils;
using Models.Soils.Nutrients;
using Models.PMF;
using APSIM.Shared.Utilities;
using System.Linq;

namespace Models
{
    [Serializable]
    public class Script : Model
    {
        [Link] Clock clock;
        [Link] Fertiliser fertiliser;
        [Link] ISummary summary;
        [Link] Soil soil;

        private Nutrient nutrient;
        private SoilNitrogen soilN;

        [Separator("Fertiliser will be applied on the date(s) below")]
        [Description("Apply fertiliser on the same day(s) each year? If no, then must include the year of appliaction below")]
        public bool EachYear { get; set; }

        [Description("Dates for one or more fertiliser applications (dd-mmm or dd-mmm-yyyy) as a list with a comma between dates")]
        public string[] Dates { get; set; }

        [Separator("Test for the mineral N in the soil and don't apply the fertiliser if greater than X kgN/ha is stored in the soil above a depth of Y mm")]
        [Description("Use a critical soil mineral N to prevent application above a threshold?")]
        public bool UseCritNThreshold { get; set; }

        [Description("Don't add fertiliser if N in the soil to the depth below exceeds (kg/ha)")]
        public double CritNThreshold { get; set; }

        [Description("Depth to which the amount of N in the soil should be calculated (mm)")]
        public double CritNDepth { get; set; }

        [Separator("Fertiliser application details")]
        [Description("Depth at which to apply the fertiliser (mm)")]
        public double Depth { get; set; }

        [Description("Amount of fertiliser to apply (kg N /ha) per application")]
        public double Amount { get; set; }

        [Description("Fertiliser type - select from the list")]
        public Fertiliser.Types FertiliserType { get; set; }


        [EventSubscribe("StartOfSimulation")]
        private void FindSoilNOrNutrient(object sender, EventArgs e)
        {
            nutrient = Apsim.Find(this, typeof(Nutrient)) as Nutrient;
            soilN = Apsim.Find(this, typeof(SoilNitrogen)) as SoilNitrogen;

            if (nutrient == null && soilN == null)
                throw new Exception(string.Format("Error in script {0}: Unable to find nutrient or soilN.", Name));
        }

        [EventSubscribe("DoManagement")]
        private void OnDoManagement(object sender, EventArgs e)
        {
            if (OnApplicationDate())
            {
                if (NContentBelowThreshold())
                    fertiliser.Apply(Amount, FertiliserType, Depth);
                else
                    summary.WriteMessage(this, "Skipping fertiliser application due to soil mineral N content being above critical threshold.");
            }
        }

        /// <summary>Checks if today's date is one of the specified fertiliser application dates.</summary>
        private bool OnApplicationDate()
        {
            if (EachYear)
                return Dates.Any(d => DateUtilities.DatesEqual(d, clock.Today));
            
            DateTime[] dates = Dates.Select(d => DateTime.ParseExact(d, "d-MMM-yyyy", null)).ToArray();
            return dates.Any(d => SameDate(d, clock.Today));
        }

        /// <summary>Checks if N content in soil is below critical threshold.</summary>
        private bool NContentBelowThreshold()
        {
            if (!UseCritNThreshold)
                return true;
            
            double[] weights = GetLayerWeights();
            double cumSoilN = 0;

            for (int i = 0; i < soil.Thickness.Length; i++)
            {
                if (nutrient != null)
                    cumSoilN += weights[i] * nutrient.MineralN[i];
                else if (soilN != null)
                    cumSoilN += weights[i] * soilN.mineral_n[i];
            }

            return cumSoilN <= CritNThreshold;
        }

        private double[] GetLayerWeights()
        {
            double[] weights = new double[soil.Thickness.Length];
            double cumDepth = 0;

            for (int i = 0; i < soil.Thickness.Length; i++)
            {
                cumDepth += soil.Thickness[i];
                if (cumDepth < CritNDepth)
                    weights[i] = 1;
                else if (cumDepth - soil.Thickness[i] <= CritNDepth)
                    weights[i] = (CritNDepth - (cumDepth - soil.Thickness[i])) / soil.Thickness[i];
                else
                    weights[i] = 0;
            }

            return weights;
        }

        private bool SameDate(DateTime d1, DateTime d2)
        {
            return d1.Year == d2.Year && d1.DayOfYear == d2.DayOfYear;
        }
    }
}
```
          Manager AutomaticIrrigation
            allowIrrigation = True
            seasonStart = 15-Aug
            seasonEnd = 30-May
            seasonsAllocation = 10000
            triggerDeficit = 75
            targetDeficit = 99
            returndays = 1
            maximumAmount = 30
            depthPAWC = 300
```csharp
using System;
using Models.Core;
using Models.PMF;
using Models.Soils;
using System.Xml.Serialization;
using Models.PMF;
using APSIM.Shared.Utilities;

        
namespace Models
{
    [Serializable] 
    [System.Xml.Serialization.XmlInclude(typeof(Model))]
    public class Script : Model
    {
        //Communication to other modules
        [Link] ISummary summary = null;
        [Link] Irrigation Irrigation;
        [Link] Clock Clock;
        [Link] Soil Soil;
        [Link(IsOptional = true)] IPlant existingCrop;
       
        //User inputs from properties tab
        [Description("Turn irrigation on?")]
        public bool allowIrrigation { get; set; }
        [Description("Start of irrigation season (dd-MMM)")]
        public string seasonStart { get; set; }
        [Description("End of irrigation season (dd-MMM)")]
        public string seasonEnd { get; set; }
        [Description("Season allocation (mm)")]
        public double seasonsAllocation { get; set; }
        [Description("Deficit to trigger irrigation (% PAWC)")]
        public double triggerDeficit { get; set; }
        [Description("Deficit to stop irrigaton (% PAWC)")]
        public double targetDeficit { get; set; }
        [Description("Minimum days for irrigation to return")]
        public double returndays { get; set; }
        [Description("Maximum irrigation application (mm/day)")]
        public double maximumAmount { get; set; }
        [Description("Depth to calculate PAWC (mm)")]
        public double depthPAWC { get; set; }

        //Class members
        [XmlIgnore] public double TopSWdeficit { get; set; }
        [XmlIgnore] public double TopSWC { get; set; }
        [XmlIgnore] public double DaysSinceIrrigation { get; set; }
        [XmlIgnore] public double AmountToApply { get; set; }
        [XmlIgnore] public double SeasonAppliedAmount { get; set; }
        
        private bool IrrigationIsAllowed { get; set; }
        private bool SeasonIsOpen { get; set; }
        private bool CropIsActive { get; set; }
        private bool IrrigatorIsAvailable { get; set; }
        private bool SoilIsDry { get; set; }

        private DateTime StartDate;
        private DateTime EndDate;
        private double TopDUL;
        private double TopLL;
        private int nLayers;
    
        //Calculate static soil variables
        [EventSubscribe("StartOfSimulation")]
        private void OnStartOfSimulation(object sender, EventArgs e)
        {   
            //Set the season dates
            StartDate = DateTime.Parse(seasonStart + "-" + Clock.Today.Year.ToString());
            EndDate = DateTime.Parse(seasonEnd + "-" + Clock.Today.Year.ToString());
            
            //Can we irrigate at all?
            IrrigationIsAllowed = false; 
            if (allowIrrigation)
                IrrigationIsAllowed = true; 

            //Calculate soil water variables
            double depthFromSurface = 0.0;
            double fracLayer = 0.0;
            nLayers = Soil.Thickness.Length;
            for (int layer = 0; layer < nLayers; layer++)
            {
                fracLayer = Math.Min(1.0, (depthPAWC - depthFromSurface) / Soil.Thickness[layer]);
                TopLL += Soil.LL15mm[layer] * fracLayer;
                TopDUL += Soil.DULmm[layer] * fracLayer;
                depthFromSurface += Soil.Thickness[layer];
                if (depthFromSurface >= depthPAWC)
                    layer = nLayers;
            }
        }
             
        //Determine daily requirement for irrigation
        [EventSubscribe("StartOfDay")]
        private void OnStartOfDay(object sender, EventArgs e)
        {
            //Can we irrigate today?          
            SeasonIsOpen = isBetween(Clock.Today, StartDate, EndDate);

            //Is there a crop in the ground that needs irrigation?
            CropIsActive = false;
            if ((existingCrop != null) && (existingCrop.IsAlive))
                CropIsActive = true;
            //if ((existingCrop.Phenology.Stage >= 3.0) && (existingCrop.Phenology.Stage < 6.0))
          
            //Is the irrigator available?
            IrrigatorIsAvailable = false;
            DaysSinceIrrigation += 1;
            if (DaysSinceIrrigation >= returndays)
                IrrigatorIsAvailable = true;
          
            //Is the soil dry enough to require irrigation?
            SoilIsDry = false;
            double depthFromSurface = 0.0;
            double fracLayer = 0.0;
            TopSWC = 0.0;
            for (int layer = 0; layer < nLayers; layer++)
            //for (int layer = 0; depthFromSurface < depthPAWC + Soil.Thickness[layer]; layer++)
            {
                fracLayer = Math.Min(1.0, (depthPAWC - depthFromSurface) / Soil.Thickness[layer]);
                TopSWC += Soil.SoilWater.SWmm[layer] * fracLayer;
                depthFromSurface += Soil.Thickness[layer];
                if (depthFromSurface >= depthPAWC)
                    layer = nLayers;
            }
            
            TopSWdeficit = TopSWC - TopDUL;
            if (Math.Max(0.0, -TopSWdeficit) >= (TopDUL - TopLL) * (100 - triggerDeficit) / 100)
                SoilIsDry = true;
                
            //Are all the conditions ratifying irrigation
            if (IrrigationIsAllowed && SeasonIsOpen && CropIsActive && IrrigatorIsAvailable && SoilIsDry)
            {
                //Lets bloody well irrigate then!!!!
                AmountToApply = TopDUL * targetDeficit / 100 - TopSWC;
                AmountToApply = Math.Max(0.0, Math.Min(AmountToApply, seasonsAllocation - SeasonAppliedAmount));
                Irrigation.Apply(AmountToApply);
                DaysSinceIrrigation = 0;
                SeasonAppliedAmount += AmountToApply;
            }
        }
        
        ///Checks whether theDate is between iniDate and endDate (non-year specific)
        private bool isBetween(DateTime theDay, DateTime iniDate, DateTime endDate)
        {
            bool result = false;
            if (iniDate.DayOfYear < endDate.DayOfYear)
            {
                // period is within one year, ex: summer in the northern hemisphere
                if ((theDay.DayOfYear >= iniDate.DayOfYear) && (theDay.DayOfYear <= endDate.DayOfYear))
                    result = true;
            }
            else
            {
                // period goes over the end of the year, ex: summer in the southern hemisphere
                if ((theDay.DayOfYear >= iniDate.DayOfYear) || (theDay.DayOfYear <= endDate.DayOfYear))
                    result = true;
            }
            
            return result;
        }
    }
}
```
          Manager ReportHelper
            ReportEveryYear_Name = [AnnualReporting]
            ReportEveryYear_Dates = 30-jun
            ReportSpecificDates_Name =
            ReportSpecificDates_Dates =
            script: same as in SimpleReportingSim.Field.ReportHelper
          MicroClimate: a_interception=0; b_interception=1; c_interception=0; d_interception=0; soil_albedo=0.23; SoilHeatFluxFraction=0.4; NightInterceptionFraction=0.5; ReferenceHeight=2
          Irrigation
          Fertiliser
          SurfaceOrganicMatter: InitialResidueName=Sward; InitialResidueType=grass; InitialResidueMass=1000; InitialStandingFraction=0; InitialCPR=0; InitialCNR=15; FractionFaecesAdded=0.5
          Soil: SoilType=NZ_Sedimentary; LocalName=Lismore; Site=Winchmore; NearestTown=Ashburton; Region=Canterbury; Country=New Zealand; Latitude=-48.48; Longitude=0
            Chemical
              Thickness  NO3N  NH4N  PH
              150        5     0.1   6
              150        2.5   0.1   6
              200        1     0.1   6
              150        0.75  0.1   6
              250        0.5   0.1   6
              300        0.5   0.1   6
              300        0.5   0.1   6
            Physical
              Thickness  ParticleSizeClay  BD    AirDry  LL15   DUL    SAT   KS
              150        20                1.3   0.05    0.15   0.36   0.45  5000
              150        15                1.35  0.12    0.14   0.34   0.43  2500
              200        12                1     0.055   0.055  0.19   0.25  3000
              150        8                 0.53  0.015   0.015  0.065  0.15  10000
              250        6                 0.31  0.01    0.01   0.04   0.11  17500
              300        5                 0.3   0.01    0.01   0.03   0.11  20000
              300        5                 0.3   0.01    0.01   0.03   0.11  20000
              SoilCrop AGPRyegrassSoil: LL=[0.15, 0.14, 0.06, 0.02, 0.01, 0.01, 0.01]; KL=[0.1, 0.1, 0.08, 0.04, 0.01, 0, 0]; XF=[1, 1, 1, 1, 1, 0, 0]
              SoilCrop AGPWhiteCloverSoil: LL=[0.15, 0.14, 0.06, 0.02, 0.01, 0.01, 0.01]; KL=[0.1, 0.1, 0.08, 0.04, 0.01, 0, 0]; XF=[1, 1, 1, 1, 1, 0, 0]
            SoilWater: SummerDate=1-Nov; SummerU=6; SummerCona=3.5; WinterDate=1-apr; WinterU=2; WinterCona=2; DiffusConst=88; DiffusSlope=35; Salb=0.13; CN2Bare=73; CNRed=20; CNCov=0.8; slope=0; discharge_width=0; catchment_area=0; max_pond=0; PrecipitationInterception=0
              Thickness  SWCON  KLAT
              150        0.5    0
              150        0.52   0
              200        0.55   0
              150        0.6    0
              250        0.65   0
              300        0.65   0
              300        0.65   0
            SoilNitrogen: fom_types=[default, manure, mucuna, lablab, shemp, stable]; fract_carb=[0.2, 0.3, 0.54, 0.57, 0.45, 0]; fract_cell=[0.7, 0.3, 0.37, 0.37, 0.47, 0.1]; fract_lign=[0.1, 0.4, 0.09, 0.06, 0.08, 0.9]
              SoilNitrogenNO3 NO3
              SoilNitrogenNH4 NH4
              SoilNitrogenUrea Urea
              SoilNitrogenPlantAvailableNO3 PlantAvailableNO3
              SoilNitrogenPlantAvailableNH4 PlantAvailableNH4
            Organic: FOMCNRatio=40
              Thickness  Carbon  SoilCNRatio  FBiom  FInert  FOM
              150        3       12           0.04   0.5     331.337
              150        1       12           0.02   0.7     245.461
              200        0.6     12           0.02   0.83    164.537
              150        0.4     12           0.01   0.9     121.892
              250        0.25    12           0.01   0.95    73.9313
              300        0.15    12           0      0.99    40.5743
              300        0.1     12           0      0.99    22.2677
            InitialWater Initial water: PercentMethod=1; FractionFull=0.95
            Sample Initial nitrogen: Thickness=[150, 150, 200, 150, 250, 300, 300]; SWUnits=Volumetric; OCUnits=Total; PHUnits=Water
            CERESSoilTemperature
          PastureSpecies AGPRyegrass: Albedo=0.26; Gsmax=0.011; R50=200; InitialShootDM=1500; InitialRootDM=450; InitialRootDepth=750; initialDMFractionsGrasses=[0.15, 0.25, 0.25, 0.05, 0.05, 0.1, 0.1, 0.05, 0, 0, 0]; initialDMFractionsForbs=[0.2, 0.2, 0.15, 0.05, 0.1, 0.15, 0.1, 0.05, 0, 0, 0]; ReferencePhotosyntheticRate=1; LightExtinctionCoefficient=0.5; GrowthTminimum=1; GrowthToptimum=20; GrowthTEffectExponent=1.7; HeatOnsetTemperature=28; HeatFullTemperature=35; HeatRecoverySumDD=30; HeatRecoveryTReference=25; ColdOnsetTemperature=1; ColdFullTemperature=-5; ColdRecoverySumDD=25; MaintenanceRespirationCoefficient=0.03; GrowthRespirationCoefficient=0.25; RespirationTReference=20; NThresholdsForLeaves=[0.04, 0.012, 0.05]; NThresholdsForStems=[0.02, 0.006, 0.025]; NThresholdsForStolons=[0, 0, 0]; NThresholdsForRoots=[0.02, 0.006, 0.025]; DegreesDayForGermination=125; TargetShootRootRatio=4; MaxRootAllocation=0.25; ShootRootGlfFactor=0.5; ReproSeasonReferenceLatitude=41; ReproSeasonTimingCoeff=0.14; ReproSeasonMaxAllocationIncrease=0.5; ReproSeasonAllocationCoeff=0.1; FractionLeafMaximum=0.7; FractionLeafMinimum=0.7; FractionLeafDMThreshold=500; FractionLeafDMFactor=2000; FractionLeafExponent=3; SpecificLeafArea=20; SpecificRootLength=100; ShootMaxEffectOnLAI=1000; MaxStemEffectOnLAI=1; LiveLeavesPerTiller=3; TissueTurnoverRateShoot=0.05; TissueTurnoverRateRoot=0.02; DetachmentRateShoot=0.08; TurnoverTemperatureMin=2; TurnoverTemperatureRef=20; TurnoverTemperatureExponent=1; TurnoverDroughtEffectMax=1; TurnoverDroughtThreshold=0.5; TurnoverDefoliationCoefficient=0.5; TurnoverDefoliationRootEffect=0.1; FractionNLuxuryRemobilisable=[0.1, 0.1, 0.1]; SoilSaturationEffectMax=0.1; MinimumWaterFreePorosity=-1; SoilSaturationRecoveryFactor=0.25; NDillutionCoefficient=0.25; GlfGeneric=1; GlfSoilFertility=1; PlantHeightMinimum=300; PlantHeightMaximum=300; PlantHeightMassForMax=10000; PlantHeightExponent=2.8; RootDepthMinimum=50; RootDepthMaximum=1000; RootElongationRate=25; RootDistributionDepthParam=250; RootDistributionExponent=3.2; RootBottomDistributionFactor=1.05; DigestibilitiesCellWall=[0.9, 0.7, 0.6, 0.2]; MinimumGreenWt=100; PreferenceForGreenOverDead=1; PreferenceForLeafOverStems=1; MaximumNUptake=10
            zero: LAI, SpeciesFamily, PhotosyntheticPathway, UseHeatStressFactor, UseColdStressFactor, ColdRecoveryTReference, UseReproSeasonFactor, FractionToStolon, StolonEffectOnLAI, MinimumNFixation, MaximumNFixation, SymbiontCostFactor, NFixingCostFactor, FractionStolonStanding, WaterAvailableMethod, NitrogenAvailableMethod, LAIGreen
            initialDMFractionsLegumes=[0.16, 0.23, 0.22, 0.05, 0.03, 0.05, 0.05, 0.01, 0.04, 0.08, 0.08]
          PastureSpecies AGPWhiteClover: Albedo=0.26; Gsmax=0.011; R50=200; SpeciesFamily=1; InitialShootDM=500; InitialRootDM=150; InitialRootDepth=350; initialDMFractionsGrasses=[0.15, 0.25, 0.25, 0.05, 0.05, 0.1, 0.1, 0.05, 0, 0, 0]; initialDMFractionsForbs=[0.2, 0.2, 0.15, 0.05, 0.1, 0.15, 0.1, 0.05, 0, 0, 0]; ReferencePhotosyntheticRate=1; LightExtinctionCoefficient=0.8; GrowthTminimum=2; GrowthToptimum=22; GrowthTEffectExponent=1.7; HeatOnsetTemperature=30; HeatFullTemperature=36; HeatRecoverySumDD=20; HeatRecoveryTReference=25; ColdOnsetTemperature=2; ColdFullTemperature=-5; ColdRecoverySumDD=20; MaintenanceRespirationCoefficient=0.04; GrowthRespirationCoefficient=0.25; RespirationTReference=20; NThresholdsForLeaves=[0.045, 0.02, 0.055]; NThresholdsForStems=[0.0225, 0.01, 0.0275]; NThresholdsForStolons=[0.0225, 0.01, 0.0275]; NThresholdsForRoots=[0.0225, 0.01, 0.0275]; DegreesDayForGermination=125; TargetShootRootRatio=4; MaxRootAllocation=0.25; ShootRootGlfFactor=0.5; ReproSeasonReferenceLatitude=41; ReproSeasonTimingCoeff=0.14; ReproSeasonMaxAllocationIncrease=0.5; ReproSeasonAllocationCoeff=0.1; FractionLeafMaximum=0.56; FractionLeafMinimum=0.28; FractionLeafDMThreshold=500; FractionLeafDMFactor=2000; FractionLeafExponent=3; FractionToStolon=0.2; SpecificLeafArea=32; SpecificRootLength=45; StolonEffectOnLAI=0.3; ShootMaxEffectOnLAI=500; MaxStemEffectOnLAI=0.5; LiveLeavesPerTiller=3; TissueTurnoverRateShoot=0.05; TissueTurnoverRateRoot=0.02; DetachmentRateShoot=0.11; TurnoverTemperatureMin=2; TurnoverTemperatureRef=20; TurnoverTemperatureExponent=1; TurnoverDroughtEffectMax=1; TurnoverDroughtThreshold=0.5; TurnoverDefoliationCoefficient=0.5; TurnoverDefoliationRootEffect=0.1; FractionNLuxuryRemobilisable=[0.1, 0.1, 0.1]; MinimumNFixation=0.2; MaximumNFixation=0.6; SoilSaturationEffectMax=0.1; MinimumWaterFreePorosity=-1; SoilSaturationRecoveryFactor=0.25; NDillutionCoefficient=1; GlfGeneric=1; GlfSoilFertility=1; PlantHeightMinimum=300; PlantHeightMaximum=300; PlantHeightMassForMax=7500; PlantHeightExponent=2.5; RootDepthMinimum=30; RootDepthMaximum=350; RootElongationRate=25; RootDistributionDepthParam=70; RootDistributionExponent=2.5; RootBottomDistributionFactor=1.05; DigestibilitiesCellWall=[0.9, 0.8, 0.7, 0.2]; MinimumGreenWt=50; PreferenceForGreenOverDead=1; PreferenceForLeafOverStems=1; MaximumNUptake=10
            zero: LAI, PhotosyntheticPathway, UseHeatStressFactor, UseColdStressFactor, ColdRecoveryTReference, UseReproSeasonFactor, SymbiontCostFactor, NFixingCostFactor, FractionStolonStanding, WaterAvailableMethod, NitrogenAvailableMethod, LAIGreen
            initialDMFractionsLegumes=[0.16, 0.23, 0.22, 0.05, 0.03, 0.05, 0.05, 0.01, 0.04, 0.08, 0.08]
          Report AnnualReporting
            VariableNames:
              [Clock].Today as Date
              Sum of ([AGPRyegrass].NetGrowthWt + [AGPWhiteClover].NetGrowthWt) from [AnnualReporting].DayAfterLastOutput to [Clock].Today as SumYearlyNetGrowth
              Sum([Soil].SoilNitrogen.TotalC)/1000 as SoilCarbonToday_tonnesPerHa
              Diff of Sum([Soil].SoilNitrogen.TotalC) from [Clock].StartOfSimulation to [Clock].Today as ChangeInSoilCarbon  // this is a duplicate of that below as an example - this is more generic and will be valid if the start date is changed
              Diff of Sum([Soil].SoilNitrogen.TotalC) from 01-jul-1980 to [Clock].Today as ChangeInSoilCarbon1               // the simulation starts on 1-7-80 so this gives the same output as above
              Diff of Sum([Soil].SoilNitrogen.TotalC) from 01-jul to [Clock].Today as AnnualChangeInSoilCarbon
          Report MonthlyReporting: EventNames=[Clock].EndOfMonth
            VariableNames:
              [Clock].Today as Date
              Sum of ([AGPRyegrass].NetGrowthWt + [AGPWhiteClover].NetGrowthWt) from 1-Jul to [Clock].Today as CumulativeAnnualNetGrowth
              Mean of [Soil].SoilWater.Drainage from [MonthlyReporting].DayAfterLastOutput to [Clock].Today as MeanDrainage_mmPerDay
              Sum of [Soil].SoilWater.LeachNO3 from [MonthlyReporting].DayAfterLastOutput to [Clock].Today as SumLeaching_kgPerHa
              Sum of [Soil].SoilWater.LeachNO3 from 1-Jan to [Clock].Today as CumulativeAnnualLeaching
          Report DailyReporting: EventNames=[Clock].EndOfDay
            VariableNames:
              [Clock].Today as Date
              [Soil].SoilWater.LeachNO3
              [Soil].SoilWater.Drainage
              Sum([Soil].SoilNitrogen.NO3.kgha)
      Folder Getting Annual Patterns of Herbage Accumulation
        Memo
          When working with perennial crops that are harvested or grazed frequently, often an output that plots the accumulation of growth during a year is wanted. That output should be zeroed between years. If simulating a site in the Southern Hemisphere, usually the end of the year will be in June or July (winter). Here this is achieved as "CumulativeAnnualNetGrowth" using reporting at the end of the month (see in MonthlyReporting) and:

          		Sum of ([Ryegrass].NetGrowthWt + [WhiteClover].NetGrowthWt)
          			from 1-Jul to [Clock].Today as CumulativeAnnualNetGrowth

          with the output shown as the orange line below. Note that here it is necessary to calculate the output summing ryegrass and white clover. For comparison, the pattern of accumulation is plotted against the annual total (green line) and that was specified in AnnualReporting using:

          		Sum of ([Ryegrass].NetGrowthWt + [WhiteClover].NetGrowthWt)
          			from [AnnualReporting].DayAfterLastOutput to [Clock].Today
          			as SumYearlyNetGrowth
      Folder Working with Soil Carbon
        Memo
          When working with soil carbon (or organic nitrogen), gradual changes can hide systematic changes because the totals are so large and while the changes are small, they become important. In this example, using annual reporting only, there are three examples of reporting soil carbon.

          The green line is the total soil carbon and is the most basic output. The specification is:

          		Sum([Soil].SoilNitrogen.TotalC)/1000 as SoilCarbonToday_tonnesPerHa
          where the "/1000" converts the standard output from kg /ha to tonnes /ha. The output is plotted against the right-hand axis and shows little change.

          The orange line is the annual **change** in soil carbon (plotted against the left-hand axis) was created using:

          	Diff of Sum([Soil].SoilNitrogen.TotalC) from [Clock].StartOfSimulation
          				to [Clock].Today as ChangeInSoilCarbon

          This clearly shows that soil carbon is increasing most years but that the increase is diminishing towards the end of the simulation. Note that for this simulation the line could also have been created using:

          	Diff of Sum([Soil].SoilNitrogen.TotalC)
          		from 01-jul-1980 to [Clock].Today as ChangeInSoilCarbon

          but the first version is more generic in that if the start date of the simulation is changed it will still be valid. The second version can be more useful where there is an initial spin-up period of several years before changes in soil carbon are of interest. Another form of soil carbon output that can be useful is the change within any year. That (the blue line) shows even more clearly the slow stabilisation of the total carbon and is specified using:

          	Diff of Sum([Soil].SoilNitrogen.TotalC)
          		from 01-jul to [Clock].Today as AnnualChangeInSoilCarbon
      Folder Daily and Monthly Leaching
        Memo
          The example below shows daily, monthly, and cumulative annual leaching. The daily output is from "DailyReporting" and is simply:

          		[Soil].SoilWater.LeachNO3
          The other two outputs are both calculated in "MonthlyReporting" as:

          		Sum of [Soil].SoilWater.LeachNO3 from [MonthlyReporting].DayAfterLastOutput
          			to [Clock].Today as SumLeaching_kgPerHa
          and

          		Sum of [Soil].SoilWater.LeachNO3
          			from 1-Jan to [Clock].Today as CumLeaching_kgPerHa
    Folder Annual Crop Example
      Memo
        In annual cropping simulations, users often want to know the values of outputs only during the period that the crop is in the ground with the outputs summarised over the interval between sowing and harvesting. The examples in this section show how to do this and also show some results that might be unexpected to look out for.
      Simulation ContinuousWheatExample
        Clock: Start=1980-01-01; End=1990-12-31
        Summary SummaryFile
        Weather: FileName=%root%\Examples\WeatherFiles\Dalby.met
        SoilArbitrator
        Zone Field: Area=1; Slope=0; AspectAngle=0; Altitude=50
          Manager Sowing: same as SimpleReportingSim.Field.Sowing
          Manager Fertilise at sowing
            Crop = [Wheat]
            FertiliserType = UreaN
            Amount = 80
            script: same as in SimpleReportingSim.Field.Fertilise at sowing
          Manager Harvest: same as SimpleReportingSim.Field.Harvest
          Manager ReportHelper
            ReportEveryYear_Name =
            ReportEveryYear_Dates =
            ReportSpecificDates_Name =
            ReportSpecificDates_Dates =
            script: same as in SimpleReportingSim.Field.ReportHelper
          Fertiliser
          Irrigation
          MicroClimate: a_interception=0; b_interception=1; c_interception=0; d_interception=0; soil_albedo=0.3; SoilHeatFluxFraction=0.4; NightInterceptionFraction=0.5; ReferenceHeight=2
          Plant Wheat: CropType=Wheat; IsEnding=false; DaysAfterEnding=0
          SurfaceOrganicMatter: InitialResidueName=wheat_stubble; InitialResidueType=wheat; InitialResidueMass=500; InitialStandingFraction=0; InitialCPR=0; InitialCNR=100; FractionFaecesAdded=0.5
          Soil: same as SimpleReportingSim.Field.Soil
          Report ReportInCropAnnually: EventNames=[Clock].EndOfYear
            VariableNames:
              [Clock].Today as Date
              [Clock].Today.Year as Year
              Sum of [Weather].Rain from [Wheat].Sowing to [Wheat].Harvesting as InCropRainfall
              Sum of [Weather].Rain from 1-Jan to [Clock].Today as AllYearRainfall
              Mean of Sum([Soil].SoilWater.SWmm) from [Wheat].Sowing to [Wheat].Harvesting as InCropMeanSoilWater
              Mean of Sum([Soil].SoilWater.SWmm[:3]) from [Wheat].Sowing to [Wheat].Harvesting as InCropMeanSoilWaterTopThreeLayers
              Mean of Sum([Soil].SoilWater.SWmm[:3]) from [Wheat].Sowing to [Wheat].Flowering as VegetativeMeanSoilWaterTopThreeLayers
              Mean of Sum([Soil].SoilWater.SWmm[:3]) from [Wheat].Flowering to [Wheat].Harvesting as ReproductiveMeanSoilWaterTopThreeLayers
              Max of ([Wheat].Grain.Wt * 10000 / 1000) from [Wheat].Sowing to [Wheat].Harvesting as FinalYield_kg_Ha // * 10000 / 1000 to convert from g/m2 to kg/ha
              Max of ([Wheat].Grain.Wt * 10000 / 1000) from [ReportInCropAnnually].DayAfterLastOutput to [Wheat].Harvesting as FinalYield_kg_Ha_v1
          Report ReportGrainOnHarvesting: EventNames=[Wheat].Harvesting
            VariableNames:
              [Clock].Today as Date
              [Clock].Today.Year as Year
              ([Wheat].Grain.Wt * 10000 / 1000) as HarvestedYield_kg_Ha
          Report ReportGrainDaily: EventNames=[Clock].EndOfDay
            VariableNames:
              [Clock].Today as Date
              [Clock].Today.Year as Year
              ([Wheat].Grain.Wt * 10000 / 1000) as Grain_kg_Ha_Daily // * 10000 / 1000 to convert from g/m2 to kg/ha
      Folder Comparing Rainfall during the Crop and All Year
        Memo
          The example below shows, for each calendar year, the amount of rain that fell when the crop was in the ground as compared to the annual rainfall. The Report frequency in "ReportInCropAnnually" is {Clock].EndOfYear and the output specifications are:

          		Sum of [Weather].Rain from [Wheat].Sowing
          			to [Wheat].Harvesting as InCropRainfall

          		Sum of [Weather].Rain from 1-Jan to
          			[Clock].Today as AllYearRainfall
      Folder Soil Water storage during the Cropping Phase
        Memo
          The next example also uses outputs from "ReportInCropAnnually" and shows how to get information about soil conditions during the crop. The output specification:

          		Mean of Sum([Soil].SoilWater.SWmm) from [Wheat].Sowing
          			to [Wheat].Harvesting as InCropMeanSoilWater
          gives the whole-soil profile soil water storage as a mean while the crop is in the ground. The output is reported at the end of the year but is for the period from sowing to harvesting only. If the interest is only in the water storage in the top three layers then the specification would be:

          		Mean of Sum([Soil].SoilWater.SWmm[:3]) from [Wheat].Sowing
          			to [Wheat].Harvesting as InCropMeanSoilWaterTopThreeLayers
          and that produces the black line in the figure below. If the interest was in the water storage during the vegetative stages compared to the reproductive stages then:

          		Mean of Sum([Soil].SoilWater.SWmm[:3]) from [Wheat].Sowing
          			to [Wheat].Flowering as VegetativeMeanSoilWaterTopThreeLayers
          and

          		Mean of Sum([Soil].SoilWater.SWmm[:3]) from [Wheat].Flowering
          			to [Wheat].Harvesting as ReproductiveMeanSoilWaterTopThreeLayers
          produce the green and red lines to show that there was less water storage during the reproductive stages. Of course other types of aggregation could be reported such as the difference durign the phases, min/max etc.
      Folder Reporting Yield and When Things Can Seem to Go Wrong
        Memo
          The Report model is a powerful and very useful component to get the information needed from the simulation - but there are some traps that should be noted.

          The example below is primarily based on "ReportInCropAnnually" which has a reporting frequency of [Clock].EndOfYear. That Report uses an output specification of:

          			Max of ([Wheat].Grain.Wt * 10000 / 1000) from [Wheat].Sowing
          				to [Wheat].Harvesting as FinalYield_kg_Ha
          				// * 10000 / 1000 to convert from g/m2 to kg/ha
          (note that the double slash, //, denotes a comment which is shown in green in the user interface). This produces the green line in the figure below. It is immediately noticeable that the yeild in late 1984 was exactly the same as the previous year - this should raise red flags. Alternative outputs that might be expected to give the same values are:

          			Max of ([Wheat].Grain.Wt * 10000 / 1000)
          				from [ReportInCropAnnually].DayAfterLastOutput
          				to [Wheat].Harvesting as FinalYield_kg_Ha_v1
          also at a reporting frequency of [Clock].EndOfYear (the black line), or

          			([Wheat].Grain.Wt * 10000 / 1000) as HarvestedYield_kg_Ha
          with a reporting frequency of [Wheat].Harvesting which produced the orange line (see ReportGrainOnHarvesting), or for more detail report the same output on a daily basis (see ReportGrainDaily) which is the blue line.

          The additional reporting clearly shows that there was no grain yield in 1984 and further investigation (the summary file) shows that there was no crop sown because the sowing conditions were not met. The apparent yield in the green line is not an error in Report but is a result of the specification in combination with the possibility that there will not be a crop every year. When Report does its work at the end of 1984 it outputs the maximum grain yield from the last sowing event to the last harvesting event from the Wheat model - and these were the ones from 1983. This has also affected the green line in Section 5.2.1 and all the lines in 5.2.2 but they were not so immediately obvious. The salient message is to consider the output specifications within the context of the management conditions in the simulation.
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