Simulations: Version=67
  Memo About this example
    **About this example**

    The simulations in this example are mostly nonsense - tjey are here to show examples of the different reporting capabilities and to provide a test that they continue to produce the correct results.

    Several  of the Report models have been placed inside Folders. This is not required to make the simulation run but neither does it break the simulation. Their purpose is only to create headings in the generated documentation.
  Folder Simple Reporting
    Memo Reporting Basics
      Setting up outputs from a simulation requires describing **what** to output and **when** that should be done.

      **Properties - setting up what should be reported**

      Figure 1 shows a screen capture of a simple report. The upper box (Properties) holds descriptions of what should be reported. The general syntax is:

      			[Model].Variable
      The first part, "[Model]" just above, gives the name of a model in the simulation. Models are almost any component in the simulation - e.g. Clock, Weather, Wheat, Irrigation - including Manager scripts (lthough these are a slightly special case and more on that below). The name of the model must be in square brackets. As with Manager scripts, Properties uses Intellisense to assist with constructing the output descripters. For example, see row 1 of Figure 1. After typing "[Clock]" once a "." is typed a drop-down list of possible variables will appear as hints and in Figure 1 the choice from the list was "Today" which gives the date of the simulation output.

      *Note that model and variable names are case-sensitive. Capitalisation in the right places is important.*

      The component "ReportSimple" shows four output examples (see also below). The second row (see also below) shows an example of relabelling the output (the "as DairyRainfall" text) - this simply allows the user to give a more relvant label for the output in the output file.

      			[Weather].Rain as DailyRainfall

      The third row shows that it may be necessary to work through several layers to get to the output wanted. In each case a "." after the variable name gives a list with hints for outputs.

      			[Wheat].Grain.Total.Wt

      The fourth row (also below) shows the special case of reporting an output from a Manager script. The first part ("[SowingRule]") is the name of the Mangager script (so the output text needs to say current with any name changes you might make). Outputs from Managers always need a ".Script" before Intellisense will show the possible outputs.

      			[SowingRule].Script.SowingDepth

      **Reporting frequency - setting up when reports should happen**

      Also needed is a specification of *when* an output should be made. The instruction for when to report is in the form of:

      			[Model].Event
      An Event is something that happens, like a stage of the day or a management action. The most-used example of a reporting frequency is:

      			[Clock].EndOfDay
      and this creates an output for every "EndOfDay" event - "EndOfDay" is an event created by Clock every day after all the models have done their calculations. Any (almost) event can be used to control the frequency of reporting such as:

      			[Wheat].Sowing
      			[Wheat].Flowering
      			[Wheat].Harvesting
      			[Wheat].PlantEnding
      where “Wheat” might be any crop. This also shows that multiple triggers for reporting can be used.

      **Note that other events:

      			[Irrigation].Irrigated
      			[Fertiliser].Fertilised
      should work but currently do not (as of 11 October 2019).**

      It is worth noting that when an event is used to trigger reporting, the output happens immediately rather than at the end of the simulation day. If you are getting strange outupts then consider this as a possible reason. To understand more about what order models do their calculations see https://apsimnextgeneration.netlify.com/development.
    Memo Reporting Arrays
      Several of the outputs from APSIM are arrays - water content in the soil layers is a good example of this - tand there are some features that make reporting arrays easier in APSIM.

      To report all elements of an array, the syntax is the same as reporting a single variable. See for example in Row 2 of "ReportArrays the text

      			[Soil].SoilWater.SWmm
      produces one column of output for each element (soil layer) in the array. When a particular layer is wated then specify that in square brackets so the "[1]" is the top (closest to the soil surface) layer. For example,

      			[Soil].SoilWater.SWmm[1] as TopLayerWater_mm

      More often some sort of aggregation is in the array is wanted. There are three options for specifying which elements should be addressed. Giving no layer information at all includes all of the array. A range is specified as, for example [3:6] for the third to sixth (inclusive, meaning four elements) layers. Giving the colon but no numerical value means from the first (e.g. [:5]) or to the last (e.g. [2:]) elements. Seome examples are in ReportArrays and pasted below.

      			Sum([Soil].SoilWater.SWmm) as TotalWaterStored
      			Sum([Soil].SoilWater.SWmm[1:2]) as WaterStoredTop2Layers
      			Sum([Soil].SoilWater.SWmm[1:3]) as WaterStoredTop3Layers
      			//Sum([Soil].SoilWater.SWmm[4:]) as WaterStoredLayer4AndBelow
      			//Sum([Soil].SoilWater.SWmm[:6]) as WaterStoredDowntoLayer6

      Options for how to aggregate the elements of the arrays are: Sum, Mean, Min, and Max.

      			Mean([Soil].Nutrient.NO3.ppm[1:4]) as MeanNO3ppmTop4Layers
      			Min([Soil].Nutrient.NO3.ppm[1:4]) as MinNO3ppmTop4Layers
      			Max([Soil].Nutrient.NO3.ppm[1:4]) as MaxNO3ppmTop4Layers
    Memo Reporting that is Aggregated in Time
      Several of the outputs from APSIM are arrays - water content in the soil layers is a good example of this - tand there are some features that make reporting arrays easier in APSIM.

      To report all elements of an array, the syntax is the same as reporting a single variable. See for example in Row 2 of "ReportArrays the text

      			[Soil].SoilWater.SWmm
      produces one column of output for each element (soil layer) in the array. When a particular layer is wated then specify that in square brackets so the "[1]" is the top (closest to the soil surface) layer. For example,

      			[Soil].SoilWater.SWmm[1] as TopLayerWater_mm

      More often some sort of aggregation is in the array is wanted. There are three options for specifying which elements should be addressed. Giving no layer information at all includes all of the array. A range is specified as, for example [3:6] for the third to sixth (inclusive, meaning four elements) layers. Giving the colon but no numerical value means from the first (e.g. [:5]) or to the last (e.g. [2:]) elements. Seome examples are in ReportArrays and pasted below.

      			Sum([Soil].SoilWater.SWmm) as TotalWaterStored
      			Sum([Soil].SoilWater.SWmm[1:2]) as WaterStoredTop2Layers
      			Sum([Soil].SoilWater.SWmm[1:3]) as WaterStoredTop3Layers
      			//Sum([Soil].SoilWater.SWmm[4:]) as WaterStoredLayer4AndBelow
      			//Sum([Soil].SoilWater.SWmm[:6]) as WaterStoredDowntoLayer6

      Options for how to aggregate the elements of the arrays are: Sum, Ave, Min, and Max.
    Simulation SimpleReportingSim
      Clock: Start=1980-01-01; End=1981-12-31
      Summary SummaryFile
      Weather: FileName=WeatherFiles\Dalby.met
      SoilArbitrator
      Zone Field: Area=1; Slope=0
        Folder Managers
          Manager SowingRule
            StartDate = 1-may
            EndDate = 10-jul
            MinESW = 100
            MinRain = 25
            RainDays = 7
            CultivarName = Hartog
            SowingDepth = 30
            RowSpacing = 250
            Population = 120
```csharp
using System;
using Models.Core;
using Models.PMF;
using Models.Soils;
using Models.Soils.Nutrients;
using Models.Utilities;
using APSIM.Shared.Utilities;

namespace Models
{
    [Serializable]
    public class Script : Model
    {
        [Link] Clock Clock;
        [Link] Fertiliser Fertiliser;
        [Link] Summary Summary;
        [Link] Plant Wheat;
        [Link] Soil Soil; 
        Accumulator accumulatedRain;
        
        [Description("Start of sowing window (d-mmm)")]
        public string StartDate { get; set;}
        [Description("End of sowing window (d-mmm)")]
        public string EndDate { get; set;}
        [Description("Minimum extractable soil water for sowing (mm)")]
        public double MinESW { get; set;}
        [Description("Accumulated rainfall required for sowing (mm)")]
        public double MinRain { get; set;}
        [Description("Duration of rainfall accumulation (d)")]
        public int RainDays { get; set;}
        [Description("Cultivar to be sown")]
        [Display(Type=DisplayType.CultivarName)]
        public string CultivarName { get; set;}
        [Description("Sowing depth (mm)")]
        public double SowingDepth { get; set;}        
        [Description("Row spacing (mm)")]
        public double RowSpacing { get; set;}    
        [Description("Plant population (/m2)")]
        public double Population { get; set;}    
        
        
        [EventSubscribe("Commencing")]
        private void OnSimulationCommencing(object sender, EventArgs e)
        {
            accumulatedRain = new Accumulator(this, "[Weather].Rain", RainDays);
        }
        

        [EventSubscribe("DoManagement")]
        private void OnDoManagement(object sender, EventArgs e)
        {
            accumulatedRain.Update();
            
            if (DateUtilities.WithinDates(StartDate,Clock.Today,EndDate) &&
                !Wheat.IsAlive &&
                MathUtilities.Sum(Soil.SoilWater.ESW) > MinESW &&
                accumulatedRain.Sum > MinRain)
            {
               Wheat.Sow(population:Population, cultivar:CultivarName, depth:SowingDepth, rowSpacing:RowSpacing);    
            }
        
        }
        
    }
}
```
          Manager SowingFertiliser
            Amount = 160
            CropName = wheat
```csharp
using System;
using Models.Core;
using Models.PMF;
namespace Models
{
    [Serializable]
    public class Script : Model
    {
        [Link] Clock Clock;
        [Link] Fertiliser Fertiliser;
        [Link] Summary Summary;
        
        
        [Description("Amount of fertiliser to be applied (kg/ha)")]
        public double Amount { get; set;}
        
        [Description("Crop to be fertilised")]
        public string CropName { get; set;}
        
        
        

        [EventSubscribe("Sowing")]
        private void OnSowing(object sender, EventArgs e)
        {
            Model crop = sender as Model;
            if (crop.Name.ToLower()==CropName.ToLower())
                Fertiliser.Apply(Amount: Amount, Type: Fertiliser.Types.NO3N);
        }
        
    }
}
```
          Manager Harvest
```csharp
using System;
using Models.Core;
using Models.PMF;
using Models.Soils;
using Models.Soils.Nutrients;
using Models.Utilities;
using APSIM.Shared.Utilities;

namespace Models
{
    [Serializable]
    public class Script : Model
    {
        [Link] Plant Wheat;

        [EventSubscribe("DoManagement")]
        private void OnDoManagement(object sender, EventArgs e)
        {
            if (Wheat.IsReadyForHarvesting)
            {
               Wheat.Harvest();
               Wheat.EndCrop();    
            }
        
        }
        
    }
}
```
          Manager AutoIrrig
            FASW = 0
            WaterDeficit = 0
            AutoIrrigationOn = True
            FASWThreshold = 0.9
            FASWDepth = 600
```csharp
using System;
using Models.Core;
using System.Collections.Generic;
using System.Text;
using Models.Soils;
using Models.PMF;
using Models;
using System.Xml.Serialization;
using APSIM.Shared.Utilities;

namespace Models
{
    [Serializable] 
    public class Script : Model
    {
        public double FASW { get; set; }
        public double WaterDeficit  { get; set; }
    
        [Link] Zone zone;
        [Link] Irrigation irrigation;
        [Link] Soil soil;
        
        [Description("Auto irrigation on?")]
        public bool AutoIrrigationOn { get; set; }

        [Description("Threshold fraction available water (0-1)")]
        public double FASWThreshold { get; set; }

        [Description("Soil depth (mm) to which fraction available water is calculated")]
        public double FASWDepth { get; set; }

        [EventSubscribe("DoManagement")]
        private void OnDoManagement(object sender, EventArgs e)
        {
            CalculateFASW();
            if (AutoIrrigationOn)
            {
                if (FASW < FASWThreshold)
                {
                    double amount = 10;
                    irrigation.Apply(WaterDeficit, depth: 0);
                }
            }
        }
        
        private void CalculateFASW()
        {
            double[] LL15 = MathUtilities.Multiply(soil.LL15, soil.Thickness);
            double[] DUL = MathUtilities.Multiply(soil.DUL, soil.Thickness);
        
            int nlayr = GetLayerIndex();
            double cumdep = MathUtilities.Sum(soil.Thickness, 0, nlayr, 0.0);

            double excess_fr = MathUtilities.Divide((cumdep - FASWDepth), soil.Thickness[nlayr], 0.0);

            // note that results may be strange if swdep < ll15
            double avail_sw = (MathUtilities.Sum(soil.Water, 0, nlayr, 0.0)
                              - excess_fr * soil.Water[nlayr])
                              - (MathUtilities.Sum(LL15, 0, nlayr, 0.0)
                              - excess_fr * LL15[nlayr]);


            double pot_avail_sw = (MathUtilities.Sum(DUL, 0, nlayr, 0.0)
                                  - excess_fr * DUL[nlayr])
                                  - (MathUtilities.Sum(LL15, 0, nlayr, 0.0)
                                  - excess_fr * LL15[nlayr]);

            FASW = MathUtilities.Divide(avail_sw, pot_avail_sw, 0.0);
            WaterDeficit = MathUtilities.Constrain(pot_avail_sw - avail_sw, 0.0, 100000);
        }

        private int GetLayerIndex()
        {
            double[] cumThickness = soil.ThicknessCumulative;
            for (int i = 1; i < cumThickness.Length; i++)
            {
                if (FASWDepth < cumThickness[i])
                    return i - 1;
            }
            
            return cumThickness.Length - 1;
        }

    }
}
```
          Manager CountDays
            NumDays_Weather = 0
            NumDays_Management = 0
            NumDays_ManagementCalcs = 0
```csharp
using System;
using Models.Core;
using System.Collections.Generic;
using System.Text;
using Models.Soils;
using Models.PMF;
using Models;
using System.Xml.Serialization;
using APSIM.Shared.Utilities;

namespace Models
{
    [Serializable]
    public class Script : Model
    {
        [Link] Clock clock;
        [Link] Zone zone;

        [Separator("This just gives an output of days since 1 Jan 1980 to assist with testing the Report model")]
        [Description("Incremented in DoWeather")] public double NumDays_Weather { get; set; }
        [Description("Incremented in DoManagement")] public double NumDays_Management { get; set; }
        [Description("Incremented in DoManagementCalculations")] public double NumDays_ManagementCalcs { get; set; }

        [EventSubscribe("DoWeather")]
        private void OnDoWeather(object sender, EventArgs e)
        {
        	NumDays_Weather += 1.0;

		}	

        [EventSubscribe("DoManagement")]
        private void OnDoManagement(object sender, EventArgs e)
        {
        	NumDays_Management += 1.0;
        }

        [EventSubscribe("DoManagementCalculations")]
        private void OnDoManagementCalculations(object sender, EventArgs e)
        {
        	NumDays_ManagementCalcs += 1.0;
        }

    }
}
```
          Manager ReportExampleHelper (disabled)
            ReportEveryYear_Name = ReportWheneverEveryYear
            ReportEveryYear_Dates = 21-mar,23-nov,11-aug
            ReportSpecificDates_Name = ReportOnSpecificDates
            ReportSpecificDates_Dates = 03/01/1980 00:00:00,10/15/1981 00:00:00
```csharp
using System;
using Models.Core;
using System.Collections.Generic;
using System.Text;
using Models.Soils;
using Models.PMF;
using Models;
using System.Xml.Serialization;
using APSIM.Shared.Utilities;

namespace Models
{
    [Serializable]
    public class Script : Model
    {
        [Link] Clock clock;
        [Link] Zone zone;

        [Separator("NOTE - all dates or date strings are entered with comma-separation and no spaces")]
        [Separator("Example for reporting in particular days but the same days every year")]
        [Description("Name of the Report model for reporting on below dates every year: ")] public string ReportEveryYear_Name { get; set; } 
        [Description("Enter one or more dates (as dd-mmm) for reporting : ")] public string[] ReportEveryYear_Dates { get; set; } 

        [Separator("Example for reporting on absolute dates")]
        [Description("Name of the Report model for reporting on completely specified dates: ")] public string ReportSpecificDates_Name { get; set; } 
        [Description("Enter one or more dates (as dd-mmm) for reporting : ")] public DateTime[] ReportSpecificDates_Dates { get; set; } 



        [EventSubscribe("DoManagementCalculations")]
        private void OnDoManagement(object sender, EventArgs e)
        {


			// example for reporting on irregular dates but the same dates every year
        	foreach (string ddMMM in ReportEveryYear_Dates)
        	{
    			if (DateUtilities.DatesEqual(ddMMM, clock.Today))
    			{
	                Models.Report.Report myReport = Apsim.Find(zone, ReportEveryYear_Name) as Models.Report.Report;
    	            if (myReport == null)
        	            throw new Exception(string.Format("Unable to locate report {0}.", ReportEveryYear_Name));
            	    myReport.DoOutput();
    			}
        	}

			// example for reporting on fully-specified dates that are not necessarily the same dates every year
        	foreach (DateTime ddMMMyy in ReportSpecificDates_Dates)
        	{
    			if (DateUtilities.Equals(ddMMMyy, clock.Today))
    			{
	                Models.Report.Report myReport = Apsim.Find(zone, ReportSpecificDates_Name) as Models.Report.Report;
    	            if (myReport == null)
        	            throw new Exception(string.Format("Unable to locate report {0}.", ReportSpecificDates_Name));
            	    myReport.DoOutput();
    			}
        	}

        }
        
    }
}
```
        Report R01ReportSimple: EventNames=[Clock].EndOfDay
          VariableNames:
            [Clock].Today
            [Weather].Rain as DailyRainfall
            [Wheat].Grain.Total.Wt
            [SowingRule].Script.SowingDepth
            [Weather].MaxT as MaxT
            [CountDays].Script.NumDays_Weather
            [CountDays].Script.NumDays_Management
            [CountDays].Script.NumDays_ManagementCalcs
        Report R02ReportOnEvents (disabled)
          VariableNames:
            [Clock].Today
            [Wheat].AboveGroundLive.Wt
            [CountDays].Script.NumDays_Weather
            Sum of [CountDays].Script.NumDays_Weather from [R02ReportOnEvents].DateOfLastOutput to [Clock].Today as R02SumWeather
            Sum of [CountDays].Script.NumDays_Management from [R02ReportOnEvents].DateOfLastOutput to [Clock].Today as R02SumManagement
            Sum of [CountDays].Script.NumDays_ManagementCalcs from [R02ReportOnEvents].DateOfLastOutput to [Clock].Today as R02SumManageCalc
            // add [Wheat].Phenology.PhaseChanged
            // [Irrigation].Irrigated
            // [Fertiliser].Fertilised
            // when changes get merged
          EventNames:
            [Wheat].Sowing
            [Wheat].Flowering
            [Wheat].Harvesting
            [Wheat].PlantEnding
        Report R03ReportArrays (disabled): EventNames=[Clock].EndOfDay
          VariableNames:
            [Clock].Today
            Sum([Soil].SoilWater.SWmm) as TotalWaterStored
            Sum([Soil].SoilWater.SWmm[1:2]) as WaterStoredTop2Layers
            Sum([Soil].SoilWater.SWmm[1:3]) as WaterStoredTop3Layers
            //Sum([Soil].SoilWater.SWmm[4:]) as WaterStoredLayer4AndBelow
            //Sum([Soil].SoilWater.SWmm[:6]) as WaterStoredDowntoLayer6
            Mean([Soil].Nutrient.NO3.ppm[1:4]) as MeanNO3ppmTop4Layers
            Min([Soil].Nutrient.NO3.ppm[1:4]) as MinNO3ppmTop4Layers
            Max([Soil].Nutrient.NO3.ppm[1:4]) as MaxNO3ppmTop4Layers
        Report R04ReportWeekly: EventNames=[Clock].EndOfWeek
          VariableNames:
            [Clock].Today
            [Wheat].AboveGroundLive.Wt
            [CountDays].Script.NumDays_Weather
            Sum of [CountDays].Script.NumDays_Weather from [R04ReportWeekly].DateOfLastOutput to [Clock].Today as R04SumWeather
            //Sum of [CountDays].Script.NumDays_Management from [R04ReportWeekly].DateOfLastOutput to [Clock].Today as R04SumManagement
            //Sum of [CountDays].Script.NumDays_ManagementCalcs from [R04ReportWeekly].DateOfLastOutput to [Clock].Today as R04SumManageCalc
            First of [CountDays].Script.NumDays_Weather from [R04ReportWeekly].DateOfLastOutput to [Clock].Today as R04FirstWeather
            //First of [CountDays].Script.NumDays_Management from [R04ReportWeekly].DateOfLastOutput to [Clock].Today as R04FirstManagement
            //First of [CountDays].Script.NumDays_ManagementCalcs from [R04ReportWeekly].DateOfLastOutput to [Clock].Today as R04FirstManageCalc
            Last of [CountDays].Script.NumDays_Weather from [R04ReportWeekly].DateOfLastOutput to [Clock].Today as R04LastWeather
            //Last of [CountDays].Script.NumDays_Management from [R04ReportWeekly].DateOfLastOutput to [Clock].Today as R04LastManagement
            //Last of [CountDays].Script.NumDays_ManagementCalcs from [R04ReportWeekly].DateOfLastOutput to [Clock].Today as R04LastManageCalc
            Avg of [CountDays].Script.NumDays_Weather from [R04ReportWeekly].DateOfLastOutput to [Clock].Today as R04MeanWeather
            Min of [CountDays].Script.NumDays_Weather from [R04ReportWeekly].DateOfLastOutput to [Clock].Today as R04MinWeather
            Max of [CountDays].Script.NumDays_Weather from [R04ReportWeekly].DateOfLastOutput to [Clock].Today as R04MaxWeather
            Diff of [CountDays].Script.NumDays_Weather from [R04ReportWeekly].DateOfLastOutput to [Clock].Today as R04DiffWeather
        Report R05ReportMonthly: EventNames=[Clock].EndOfMonth
          VariableNames:
            [Clock].Today
            [Wheat].AboveGroundLive.Wt
            [CountDays].Script.NumDays_Weather
            Sum of [CountDays].Script.NumDays_Weather from [R05ReportMonthly].DateOfLastOutput to [Clock].Today as R05SumWeather
            //Sum of [CountDays].Script.NumDays_Management from [R05ReportMonthly].DateOfLastOutput to [Clock].Today as R05SumManagement
            //Sum of [CountDays].Script.NumDays_ManagementCalcs from [R05ReportMonthly].DateOfLastOutput to [Clock].Today as R05SumManageCalc
            First of [CountDays].Script.NumDays_Weather from [R05ReportMonthly].DateOfLastOutput to [Clock].Today as R05FirstWeather
            //First of [CountDays].Script.NumDays_Management from [R05ReportMonthly].DateOfLastOutput to [Clock].Today as R05FirstManagement
            //First of [CountDays].Script.NumDays_ManagementCalcs from [R05ReportMonthly].DateOfLastOutput to [Clock].Today as R05FirstManageCalc
            Last of [CountDays].Script.NumDays_Weather from [R05ReportMonthly].DateOfLastOutput to [Clock].Today as R05LastWeather
            //Last of [CountDays].Script.NumDays_Management from [R05ReportMonthly].DateOfLastOutput to [Clock].Today as R05LastManagement
            //Last of [CountDays].Script.NumDays_ManagementCalcs from [R05ReportMonthly].DateOfLastOutput to [Clock].Today as R05LastManageCalc
            Ave of [CountDays].Script.NumDays_Weather from [R05ReportMonthly].DateOfLastOutput to [Clock].Today as R05AveWeather
            Min of [CountDays].Script.NumDays_Weather from [R05ReportMonthly].DateOfLastOutput to [Clock].Today as R05MinWeather
            Max of [CountDays].Script.NumDays_Weather from [R05ReportMonthly].DateOfLastOutput to [Clock].Today as R05MaxWeather
            Diff of [CountDays].Script.NumDays_Weather from [R05ReportMonthly].DateOfLastOutput to [Clock].Today as R05DiffWeather
        Report R06ReportYearly: EventNames=[Clock].EndOfYear
          VariableNames:
            [Clock].Today
            [Wheat].AboveGroundLive.Wt
            [CountDays].Script.NumDays_Weather
            Sum of [CountDays].Script.NumDays_Weather from [R06ReportYearly].DateOfLastOutput to [Clock].Today as R06SumWeather
            //Sum of [CountDays].Script.NumDays_Management from [R06ReportYearly].DateOfLastOutput to [Clock].Today as R06SumManagement
            //Sum of [CountDays].Script.NumDays_ManagementCalcs from [R06ReportYearly].DateOfLastOutput to [Clock].Today as R06SumManageCalc
            First of [CountDays].Script.NumDays_Weather from [R06ReportYearly].DateOfLastOutput to [Clock].Today as R06FirstWeather
            //First of [CountDays].Script.NumDays_Management from [R06ReportYearly].DateOfLastOutput to [Clock].Today as R06FirstManagement
            //First of [CountDays].Script.NumDays_ManagementCalcs from [R06ReportYearly].DateOfLastOutput to [Clock].Today as R06FirstManageCalc
            Last of [CountDays].Script.NumDays_Weather from [R06ReportYearly].DateOfLastOutput to [Clock].Today as R06LastWeather
            //Last of [CountDays].Script.NumDays_Management from [R06ReportYearly].DateOfLastOutput to [Clock].Today as R06LastManagement
            //Last of [CountDays].Script.NumDays_ManagementCalcs from [R06ReportYearly].DateOfLastOutput to [Clock].Today as R06LastManageCalc
            Ave of [CountDays].Script.NumDays_Weather from [R06ReportYearly].DateOfLastOutput to [Clock].Today as R06AveWeather
            Min of [CountDays].Script.NumDays_Weather from [R06ReportYearly].DateOfLastOutput to [Clock].Today as R06MinWeather
            Max of [CountDays].Script.NumDays_Weather from [R06ReportYearly].DateOfLastOutput to [Clock].Today as R06MaxWeather
            Diff of [CountDays].Script.NumDays_Weather from [R06ReportYearly].DateOfLastOutput to [Clock].Today as R06DiffWeather
        Report R07ReportSimulation: EventNames=[Clock].EndOfSimulation
          VariableNames:
            [Clock].Today
            [Wheat].AboveGroundLive.Wt
            [CountDays].Script.NumDays_Weather
            Sum of [CountDays].Script.NumDays_Weather from [R07ReportSimulation].DateOfLastOutput to [Clock].Today as R07SumWeather
            //Sum of [CountDays].Script.NumDays_Management from [R07ReportSimulation].DateOfLastOutput to [Clock].Today as R07SumManagement
            //Sum of [CountDays].Script.NumDays_ManagementCalcs from [R07ReportSimulation].DateOfLastOutput to [Clock].Today as R07SumManageCalc
            First of [CountDays].Script.NumDays_Weather from [R07ReportSimulation].DateOfLastOutput to [Clock].Today as R07FirstWeather
            //First of [CountDays].Script.NumDays_Management from [R07ReportSimulation].DateOfLastOutput to [Clock].Today as R07FirstManagement
            //First of [CountDays].Script.NumDays_ManagementCalcs from [R07ReportSimulation].DateOfLastOutput to [Clock].Today as R07FirstManageCalc
            Last of [CountDays].Script.NumDays_Weather from [R07ReportSimulation].DateOfLastOutput to [Clock].Today as R07LastWeather
            //Last of [CountDays].Script.NumDays_Management from [R07ReportSimulation].DateOfLastOutput to [Clock].Today as R07LastManagement
            //Last of [CountDays].Script.NumDays_ManagementCalcs from [R07ReportSimulation].DateOfLastOutput to [Clock].Today as R07LastManageCalc
            Ave of [CountDays].Script.NumDays_Weather from [R07ReportSimulation].DateOfLastOutput to [Clock].Today as R07AveWeather
            Min of [CountDays].Script.NumDays_Weather from [R07ReportSimulation].DateOfLastOutput to [Clock].Today as R07MinWeather
            Max of [CountDays].Script.NumDays_Weather from [R07ReportSimulation].DateOfLastOutput to [Clock].Today as R07MaxWeather
            Diff of [CountDays].Script.NumDays_Weather from [R07ReportSimulation].DateOfLastOutput to [Clock].Today as R07DiffWeather
        Report ReportWeekly (disabled): EventNames=[Clock].EndOfWeek
          VariableNames:
            [Clock].Today
            [Weather].DayOfFile
            Sum of [Weather].DayOfFile from [ReportWeekly].DateOfLastOutput to [Clock].Today as SumWeeklyMaxT_V2
            Sum of [Weather].DayOfFile from [Clock].StartOfWeek to [Clock].Today as SumWeeklyMaxT
            Av22e of [Weather].DayOfFile from [Clock].StartOfWeek to [Clock].Today as MeanWeeklyMaxT
            Min of [Weather].DayOfFile from [Clock].StartOfWeek to [Clock].Today as MinWeeklyMaxT
            Max of [Weather].DayOfFile from [Clock].StartOfWeek to [Clock].Today as MaxWeeklyMaxT
            First of [Weather].DayOfFile from [Clock].StartOfWeek to [Clock].Today as FirstWeeklyMaxT
            Last of [Weather].DayOfFile from [Clock].StartOfWeek to [Clock].Today as LastWeeklyMaxT
            Diff of [Weather].DayOfFile from [Clock].StartOfWeek to [Clock].Today as DiffWeeklyMaxT
            //Sum of ([Weather].DayOfFile-[Weather].DayOfFile+1) from [Clock].StartOfWeek to [Clock].Today as CountOfDays
            //Sum of ([Weather].DayOfFile-[Weather].DayOfFile+1) from 1-Jan to [Clock].Today as Test1
            //Sum of ([Weather].DayOfFile-[Weather].DayOfFile+1) from 16-Jan to [Clock].Today as Test2
            //Sum of ([Weather].DayOfFile-[Weather].DayOfFile+1) from 24-Feb to [Clock].Today as Test3
        Report ReportWeekly1 (disabled): EventNames=[Clock].EndOfWeek
          VariableNames:
            [Clock].Today
            [CountDays].Script.NumDays1
            Sum of [CountDays].Script.NumDays1 from [ReportWeekly].DateOfLastOutput to [Clock].Today as SumWeeklyMaxT_V2
            Sum of [CountDays].Script.NumDays1 from [Clock].StartOfWeek to [Clock].Today as SumWeeklyMaxT
            Av22e of [CountDays].Script.NumDays1 from [Clock].StartOfWeek to [Clock].Today as MeanWeeklyMaxT
            Min of [CountDays].Script.NumDays1 from [Clock].StartOfWeek to [Clock].Today as MinWeeklyMaxT
            Max of [CountDays].Script.NumDays1 from [Clock].StartOfWeek to [Clock].Today as MaxWeeklyMaxT
            First of [CountDays].Script.NumDays1 from [Clock].StartOfWeek to [Clock].Today as FirstWeeklyMaxT
            Last of [CountDays].Script.NumDays1 from [Clock].StartOfWeek to [Clock].Today as LastWeeklyMaxT
            Diff of [CountDays].Script.NumDays1 from [Clock].StartOfWeek to [Clock].Today as DiffWeeklyMaxT
            Sum of ([CountDays].Script.NumDays1-[CountDays].Script.NumDays1+1) from [Clock].StartOfWeek to [Clock].Today as CountOfDays
            Sum of ([CountDays].Script.NumDays1-[CountDays].Script.NumDays1+1) from 1-Jan to [Clock].Today as Test1
            Sum of ([CountDays].Script.NumDays1-[CountDays].Script.NumDays1+1) from 16-Jan to [Clock].Today as Test2
            Sum of ([CountDays].Script.NumDays1-[CountDays].Script.NumDays1+1) from 24-Feb to [Clock].Today as Test3
        Report ReportMonthly (disabled): EventNames=[Clock].EndOfMonth
          VariableNames:
            [Clock].Today
            Sum of [Weather].MaxT from [ReportWeekly].DateOfLastOutput to [Clock].Today as SumMonthlyMaxT_V2
            Sum of [Weather].MaxT from [Clock].StartOfMonth to [Clock].Today as SumMonthlyMaxT
            Ave of [Weather].MaxT from [Clock].StartOfMonth to [Clock].Today as MeanMonthlyMaxT
            Min of [Weather].MaxT from [Clock].StartOfMonth to [Clock].Today as MinMonthlyMaxT
            Max of [Weather].MaxT from [Clock].StartOfMonth to [Clock].Today as MaxMonthlyMaxT
            First of [Weather].MaxT from [Clock].StartOfMonth to [Clock].Today as FirstMonthlyMaxT
            Last of [Weather].MaxT from [Clock].StartOfMonth to [Clock].Today as LastMonthlyMaxT
            Diff of [Weather].MaxT from [Clock].StartOfMonth to [Clock].Today as DiffMonthlyMaxT
            Sum of ([Weather].MaxT-[Weather].MaxT+1) from [Clock].StartOfMonth to [Clock].Today as CountOfDaysInMonth
        Report ReportYearly (disabled): EventNames=[Clock].EndOfYear
          VariableNames:
            [Clock].Today
            Sum of [Weather].MaxT from [ReportWeekly].DateOfLastOutput to [Clock].Today as SumYearlyMaxT_V2
            Sum of [Weather].MaxT from [Clock].StartOfYear to [Clock].Today as SumYearlyMaxT
            Ave of [Weather].MaxT from [Clock].StartOfYear to [Clock].Today as MeanYearlyMaxT
            Min of [Weather].MaxT from [Clock].StartOfYear to [Clock].Today as MinYearlyMaxT
            Max of [Weather].MaxT from [Clock].StartOfYear to [Clock].Today as MaxYearlyMaxT
            First of [Weather].MaxT from [Clock].StartOfYear to [Clock].Today as FirstYearlyMaxT
            Last of [Weather].MaxT from [Clock].StartOfYear to [Clock].Today as LastYearlyMaxT
            Diff of [Weather].MaxT from [Clock].StartOfYear to [Clock].Today as DiffYearlyMaxT
            Sum of ([Weather].MaxT-[Weather].MaxT+1) from [Clock].StartOfYear to [Clock].Today as CountOfDaysInYear
        Report ReportSimulation (disabled)
          VariableNames:
            [Clock].Today
            Sum of [Weather].MaxT from [ReportWeekly].DateOfLastOutput to [Clock].Today as SumSimulationMaxT_V2
            Sum of [Weather].MaxT from [Clock].StartOfSimulation to [Clock].Today as SumSimulationMaxT
            Ave of [Weather].MaxT from [Clock].StartOfSimulation to [Clock].Today as MeanSimulationMaxT
            Min of [Weather].MaxT from [Clock].StartOfSimulation to [Clock].Today as MinSimulationMaxT
            Max of [Weather].MaxT from [Clock].StartOfSimulation to [Clock].Today as MaxSimulationMaxT
            First of [Weather].MaxT from [Clock].StartOfSimulation to [Clock].Today as FirstSimulationMaxT
            Last of [Weather].MaxT from [Clock].StartOfSimulation to [Clock].Today as LastSimulationMaxT
            Diff of [Weather].MaxT from [Clock].StartOfSimulation to [Clock].Today as DiffSimulationMaxT
            Sum of ([Weather].MaxT-[Weather].MaxT+1) from [Clock].StartOfSimulation to [Clock].Today as CountOfDaysInSimulation
            Sum of [Weather].MaxT from [ReportWeekly].DateOfLastOutput to [Clock].Today as SumSimulationMaxT_V2
            Sum of ([Weather].MaxT-[Weather].MaxT+1) from 24-Feb to [Clock].Today as Test24Feb
            Sum of ([Weather].MaxT-[Weather].MaxT+1) from 24-Feb-1980 to [Clock].Today as Test24Feb80
          EventNames:
            [Clock].EndOfDay
            [Clock].EndOfSimulation
        Fertiliser
        Irrigation
        Soil: ASCOrder=Vertosol; ASCSubOrder=Black; SoilType=Clay; Site=Norwin; NearestTown=Norwin; Region=Darling Downs and Granite Belt; State=Queensland; Country=Australia; NaturalVegetation=Qld. Bluegrass, possible Qld. Blue gum; ApsoilNumber=900; Latitude=-27.581836; Longitude=151.320206; LocationAccuracy=+/- 20m
          DataSource=CSIRO Sustainable Ecosystems, Toowoomba; Characteriesd as part of the GRDC funded project"Doing it better, doing it smarter, managing soil water in Australian agriculture' 2011
          Comments=OC, CLL for all crops estimated-based on Bongeen Mywybilla Soil No1
          Physical
            Thickness  BD       AirDry    LL15      DUL       SAT       KS
            150        1.01056  0.13025   0.2605    0.521     0.588655  20
            150        1.07146  0.198689  0.248362  0.496723  0.565677  20
            300        1.09394  0.28      0.28      0.488438  0.557193  20
            300        1.15861  0.28      0.28      0.480297  0.532787  20
            300        1.17301  0.28      0.28      0.471584  0.527354  20
            300        1.16287  0.28      0.28      0.457071  0.53118   20
            300        1.1875   0.28      0.28      0.452332  0.521888  20
            SoilCrop WheatSoil: LL=[0.261, 0.248, 0.28, 0.306, 0.36, 0.392, 0.446]; KL=[0.06, 0.06, 0.06, 0.04, 0.04, 0.02, 0.01]; XF=[1, 1, 1, 1, 1, 1, 1]
          SoilWater: SummerDate=1-Nov; SummerU=5; SummerCona=5; WinterDate=1-Apr; WinterU=5; WinterCona=5; DiffusConst=40; DiffusSlope=16; Salb=0.12; CN2Bare=73; CNRed=20; CNCov=0.8; max_pond=0; Thickness=[150, 150, 300, 300, 300, 300, 300]; SWCON=[0.3, 0.3, 0.3, 0.3, 0.3, 0.3, 0.3]
          Organic: FOMCNRatio=40
            Thickness  Carbon  SoilCNRatio  FBiom  FInert  FOM
            150        1.2     12           0.04   0.4     347.129
            150        0.96    12           0.02   0.6     270.344
            300        0.6     12           0.02   0.8     163.972
            300        0.3     12           0.02   1       99.4541
            300        0.18    12           0.01   1       60.322
            300        0.12    12           0.01   1       36.5871
            300        0.12    12           0.01   1       22.1912
          Chemical
            Thickness  NO3N  NH4N  PH
            150        1     0.1   8
            150        1     0.1   8
            300        1     0.1   8
            300        1     0.1   8
            300        1     0.1   8
            300        1     0.1   8
            300        1     0.1   8
          InitialWater: PercentMethod=1; FractionFull=1
          Sample InitialN: Thickness=[150, 150, 300, 300, 300, 300, 300]; SWUnits=Volumetric; OCUnits=Total; PHUnits=Water
          CERESSoilTemperature
          Nutrient
            DirectedGraphInfo={Nodes=[{Name=Inert, OutlineColour=Black}, {Name=SurfaceResidue, OutlineColour=Black}, {Name=FOMLignin, OutlineColour=Black}, {Name=FOMCellulose, OutlineColour=Black}, {Name=FOMCarbohydrate, OutlineColour=Black}, {Name=Microbial, OutlineColour=Black}, {Name=Humic, OutlineColour=Black}, {Name=Urea, OutlineColour=Black}, {Name=NO3, OutlineColour=Black}, {Name=NH4, OutlineColour=Black}, {Name=Atmosphere, OutlineColour=White}, {Name=PlantAvailableNO3, OutlineColour=Black}, {Name=PlantAvailableNH4, OutlineColour=Black}], Arcs=[{SourceName=SurfaceResidue, DestinationName=Microbial}, {SourceName=SurfaceResidue, DestinationName=Humic}, {SourceName=FOMLignin, DestinationName=Microbial}, {SourceName=FOMLignin, DestinationName=Humic}, {SourceName=FOMCellulose, DestinationName=Microbial}, {SourceName=FOMCellulose, DestinationName=Humic}, {SourceName=FOMCarbohydrate, DestinationName=Microbial}, {SourceName=FOMCarbohydrate, DestinationName=Humic}, {SourceName=Microbial, DestinationName=Microbial}, {SourceName=Microbial, DestinationName=Humic}, {SourceName=Humic, DestinationName=Microbial}, {SourceName=Urea, DestinationName=NH4}, {SourceName=NO3, DestinationName=Atmosphere}, {SourceName=NH4, DestinationName=NO3}]}
        SurfaceOrganicMatter: InitialResidueName=wheat_stubble; InitialResidueType=wheat; InitialResidueMass=500; InitialStandingFraction=0; InitialCPR=0; InitialCNR=100; FractionFaecesAdded=0.5
        Plant Wheat: CropType=Wheat; IsEnding=false; DaysAfterEnding=0
        MicroClimate: a_interception=0; b_interception=1; c_interception=0; d_interception=0; soil_albedo=0.3; SoilHeatFluxFraction=0.4; NightInterceptionFraction=0.5; ReferenceHeight=2
  Simulation (disabled)
    Clock: Start=1980-01-01; End=1981-12-31
    Summary SummaryFile
    Weather: FileName=%root%\Examples\WeatherFiles\Dalby.met
    SoilArbitrator
    Zone Field: Area=1; Slope=0
      Folder Managers
        Manager SowingRule
          StartDate = 1-may
          EndDate = 10-jul
          MinESW = 100
          MinRain = 25
          RainDays = 7
          CultivarName = Hartog
          SowingDepth = 30
          RowSpacing = 250
          Population = 120
          script: same as in Simple Reporting.SimpleReportingSim.Field.Managers.SowingRule
        Manager SowingFertiliser
          Amount = 160
          CropName = wheat
          script: same as in Simple Reporting.SimpleReportingSim.Field.Managers.SowingFertiliser
        Manager Harvest
          script: same as in Simple Reporting.SimpleReportingSim.Field.Managers.Harvest
        Manager AutoIrrig
          FASW = 0
          WaterDeficit = 0
          AutoIrrigationOn = True
          FASWThreshold = 0.9
          FASWDepth = 600
          script: same as in Simple Reporting.SimpleReportingSim.Field.Managers.AutoIrrig
        Manager ReportExampleHelper: same as Simple Reporting.SimpleReportingSim.Field.Managers.ReportExampleHelper
      Report ReportDaily: EventNames=[Clock].EndOfDay
        VariableNames:
          [Clock].Today
          [Wheat].Grain.Total.Wt*10 as Yield_kgDMha  // example of changing units from g/m2 to kg/ha
          [Weather].Rain as DailyRainfall
          //this should work from any Clock event but "StartOfSimulation" fails so use "StartDay"
          Sum of [Weather].Rain from [Clock].StartDate to [Clock].Today as CumulativeRainfall
          //Sum of [Weather].Rain from [ReportExampleHelper].Script.ReportDate to [Clock].Today as CumulativeRainfall
          //the "from 1-Jan" means that the accumulation re-zeroes every year
          Sum of [Weather].Rain from 1-Jan to [Clock].Today as AnnualRainfall
          //the "from [Clock].StartOfMonth" means that the accumulation re-zeroes every first day of the month.
          Sum of [Weather].Rain from [Clock].StartOfMonth to [Clock].Today as MonthlyRainfall
          // For the examples on maximum temperature
          [Weather].MaxT as MaxT
      Folder Reporting At Irregular Intervals
        Report ReportWheneverEveryYear
          VariableNames:
            [Clock].Today
            Sum of [Weather].Rain from [ReportWheneverEveryYear].DateOfLastOutput to [Clock].Today as IrregularIntervalRainfall
        Report ReportOnSpecificDates
          VariableNames:
            [Clock].Today
            Sum of [Weather].Rain from [ReportWheneverEveryYear].DateOfLastOutput to [Clock].Today as IntervalRainfall
            Sum of [Weather].Rain from [Clock].StartDate to [Clock].Today as CumulativeIntervalAnnualRainfall
        Memo
          Sometimes in a simulation you might want to report at irregular intervals. These might align with measurement dates, some key dates in the production system.

          the first thing to note is that if you are triggering reporting from a Manager (in this example it is called "ReportExampleHelper" in the "Managers" folder) the trigger should happen after all the science models and Manager scripts have done their calculations for the day. This is acheived by putting the Manager after all the other Managers and using the "DoManagementCalculations" stage of the day when subscribing to the event in the Manager. See approximately line 26 (this may get a bit out of date sorry) in the Manager.

          		[EventSubscribe("DoManagementCalculations")]

          **Report irregularly but on the same days every year**

          The reporting from "ReportWheneverEveryYear" is driven by the Manager script "ReportExampleHelper". The first two properties give then name of this report and a list of year-free dates (i.e. as dd-mmm) on which the reporting should happen every year. See the code in ReportExampleHelper pasted below as an example of how to do this. Note that the dates do not have to be in any sensible order.

          			// example for reporting on irregular dates but the same dates every year
                  	foreach (string ddMMM in ReportEveryYear_Dates)
                  	{
              			if (DateUtilities.DatesEqual(ddMMM, clock.Today))
              			{
          	                Models.Report.Report myReport = Apsim.Find(zone, ReportEveryYear_Name) as Models.Report.Report;
              	            if (myReport == null)
                  	            throw new Exception(string.Format("Unable to locate report {0}.", ReportEveryYear_Name));
                      	    myReport.DoOutput();
              			}
                  	}

          Looking in the data reported from this component, there are six lines (three dates entered in "ReportExampleHelper" and a two-year simulation) showing the actual data for reporting and the sum of the rainfall since the last time this report model produced an output. There is no value for the first row because there is no DateOfLastOutput until the simulation progressed past an output date (that should make some sort of sense!). Of course any type(s) of outputs could be reported on these dates.

          		Sum of [Weather].Rain from [ReportWheneverEveryYear].DateOfLastOutput to [Clock].Today as IrregularIntervalRainfall

          **Report on fully-specified dates**

          This example is for when the reporting is for fully-specified dates and usually these will not be the same every year. This also driven by the Manager script "ReportExampleHelper". The third and fourth properties then name of the date-specific report and a list of one or more full dates (i.e. as dd-mmm-yyyy) on which the reporting should be tgriggered. See the code in ReportExampleHelper pasted below as an example of how to do this. Note that the dates do not have to be in any sensible order.

          			// example for reporting on fully specified dates that are not necessarily the same dates every year
                  	foreach (DateTime ddMMMyy in ReportSpecificDates_Dates)
                  	{
              			if (DateUtilities.Equals(ddMMMyy, clock.Today))
              			{
          	                Models.Report.Report myReport = Apsim.Find(zone, ReportSpecificDates_Name) as Models.Report.Report;
              	            if (myReport == null)
                  	            throw new Exception(string.Format("Unable to locate report {0}.", ReportSpecificDates_Name));
                      	    myReport.DoOutput();
              			}
                  	}

          Examining the output data in "ReportOnSpecificDates" there are only two rows - these correspond to the dates entered in "ReportExampleHelper". There are two data columns. One of these is the raainfall since the last report (as in the any-year example just above) and the other is the sum of rainfall since the start of the simulation.

          	Sum of [Weather].Rain from [ReportWheneverEveryYear].DateOfLastOutput to [Clock].Today as IntervalRainfall
          	Sum of [Weather].Rain from [Clock].StartDate to [Clock].Today as CumulativeIntervalAnnualRainfall
      Report ReportSpecificDates
        VariableNames:
          [Clock].Today
          //Sum of [Weather].Rain from [ReportWhenever].DateOfLastOutput to [Clock].Today as AnnualRainfall
        Memo
          **Report whenever you want**

          Sometimes in a simulation you might want to report at irregular intervals. These might align with measurement dates
      Report ReportOnHarvesting: EventNames=[Wheat].Harvesting
        VariableNames:
          [Clock].Today
          [Wheat].Grain.Total.Wt*10 as Yield_kgDMha  // example of changing units from g/m2 to kg/ha
          [Weather].Rain as DailyRainfall
          Sum of [Weather].Rain from 1-Jan to 31-Dec as AnnualRainfall
      Fertiliser
      Irrigation
      Soil: ASCOrder=Vertosol; ASCSubOrder=Black; SoilType=Clay; Site=Norwin; NearestTown=Norwin; Region=Darling Downs and Granite Belt; State=Queensland; Country=Australia; NaturalVegetation=Qld. Bluegrass, possible Qld. Blue gum; ApsoilNumber=900; Latitude=-27.581836; Longitude=151.320206; LocationAccuracy=+/- 20m
        DataSource=CSIRO Sustainable Ecosystems, Toowoomba; Characteriesd as part of the GRDC funded project"Doing it better, doing it smarter, managing soil water in Australian agriculture' 2011
        Comments=OC, CLL for all crops estimated-based on Bongeen Mywybilla Soil No1
        Physical
          Thickness  BD       AirDry    LL15      DUL       SAT       KS
          150        1.01056  0.13025   0.2605    0.521     0.588655  20
          150        1.07146  0.198689  0.248362  0.496723  0.565677  20
          300        1.09394  0.28      0.28      0.488438  0.557193  20
          300        1.15861  0.28      0.28      0.480297  0.532787  20
          300        1.17301  0.28      0.28      0.471584  0.527354  20
          300        1.16287  0.28      0.28      0.457071  0.53118   20
          300        1.1875   0.28      0.28      0.452332  0.521888  20
          SoilCrop WheatSoil: LL=[0.261, 0.248, 0.28, 0.306, 0.36, 0.392, 0.446]; KL=[0.06, 0.06, 0.06, 0.04, 0.04, 0.02, 0.01]; XF=[1, 1, 1, 1, 1, 1, 1]
        SoilWater: SummerDate=1-Nov; SummerU=5; SummerCona=5; WinterDate=1-Apr; WinterU=5; WinterCona=5; DiffusConst=40; DiffusSlope=16; Salb=0.12; CN2Bare=73; CNRed=20; CNCov=0.8; max_pond=0; Thickness=[150, 150, 300, 300, 300, 300, 300]; SWCON=[0.3, 0.3, 0.3, 0.3, 0.3, 0.3, 0.3]
        Organic: FOMCNRatio=40
          Thickness  Carbon  SoilCNRatio  FBiom  FInert  FOM
          150        1.2     12           0.04   0.4     347.129
          150        0.96    12           0.02   0.6     270.344
          300        0.6     12           0.02   0.8     163.972
          300        0.3     12           0.02   1       99.4541
          300        0.18    12           0.01   1       60.322
          300        0.12    12           0.01   1       36.5871
          300        0.12    12           0.01   1       22.1912
        Chemical
          Thickness  NO3N  NH4N  PH
          150        1     0.1   8
          150        1     0.1   8
          300        1     0.1   8
          300        1     0.1   8
          300        1     0.1   8
          300        1     0.1   8
          300        1     0.1   8
        InitialWater: PercentMethod=1; FractionFull=1
        Sample InitialN: Thickness=[150, 150, 300, 300, 300, 300, 300]; SWUnits=Volumetric; OCUnits=Total; PHUnits=Water
        CERESSoilTemperature
        Nutrient
          DirectedGraphInfo={Nodes=[{Name=Inert, OutlineColour=Black}, {Name=SurfaceResidue, OutlineColour=Black}, {Name=FOMLignin, OutlineColour=Black}, {Name=FOMCellulose, OutlineColour=Black}, {Name=FOMCarbohydrate, OutlineColour=Black}, {Name=Microbial, OutlineColour=Black}, {Name=Humic, OutlineColour=Black}, {Name=Urea, OutlineColour=Black}, {Name=NO3, OutlineColour=Black}, {Name=NH4, OutlineColour=Black}, {Name=Atmosphere, OutlineColour=White}, {Name=PlantAvailableNO3, OutlineColour=Black}, {Name=PlantAvailableNH4, OutlineColour=Black}], Arcs=[{SourceName=SurfaceResidue, DestinationName=Microbial}, {SourceName=SurfaceResidue, DestinationName=Humic}, {SourceName=FOMLignin, DestinationName=Microbial}, {SourceName=FOMLignin, DestinationName=Humic}, {SourceName=FOMCellulose, DestinationName=Microbial}, {SourceName=FOMCellulose, DestinationName=Humic}, {SourceName=FOMCarbohydrate, DestinationName=Microbial}, {SourceName=FOMCarbohydrate, DestinationName=Humic}, {SourceName=Microbial, DestinationName=Microbial}, {SourceName=Microbial, DestinationName=Humic}, {SourceName=Humic, DestinationName=Microbial}, {SourceName=Urea, DestinationName=NH4}, {SourceName=NO3, DestinationName=Atmosphere}, {SourceName=NH4, DestinationName=NO3}]}
      SurfaceOrganicMatter: InitialResidueName=wheat_stubble; InitialResidueType=wheat; InitialResidueMass=500; InitialStandingFraction=0; InitialCPR=0; InitialCNR=100; FractionFaecesAdded=0.5
      Plant Wheat: CropType=Wheat; IsEnding=false; DaysAfterEnding=0
      MicroClimate: a_interception=0; b_interception=1; c_interception=0; d_interception=0; soil_albedo=0.3; SoilHeatFluxFraction=0.4; NightInterceptionFraction=0.5; ReferenceHeight=2
  DataStore
  Folder
    Folder
  Folder Folder1
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