Simulations: Version=126
  Replacements
  DataStore
  Experiment Mar
    Factors
      Permutation
        Factor Cell
          CompositeFactor 4025_36675 331mm
            Specifications:
              [Soil]
              [Weather]
            Weather 4025_36675: FileName=%root%\Examples\WeatherFiles\4025_36675.met
            Soil Synthetic Soil Derived from ISRIC SoilGrids: ASCOrder=NA; ASCSubOrder=NA; SoilType=Haplic Solonchaks; Site=NA; NearestTown=NA; Region=NA; State=NA; Country=Kenya; NaturalVegetation=NA; ApsoilNumber=9999; Latitude=4.125; Longitude=36.625; LocationAccuracy=+- 250 m; DataSource=ISRIC SoilGrids
              Sample Initial nitrogen: Thickness=[150, 150, 150, 150, 200, 200, 200, 200, 300, 300]; SWUnits=Volumetric; OCUnits=Total; PHUnits=Water
              InitialWater Initial water: PercentMethod=0; FractionFull=0
              Physical
                Thickness  ParticleSizeClay  ParticleSizeSand  ParticleSizeSilt  BD     AirDry  LL15   DUL    SAT    KS
                150        34                42                24.2              1.313  0.088   0.263  0.376  0.473  6.804
                150        36                39.5              24.5              1.329  0.09    0.27   0.382  0.47   5.395
                150        36.5              38.7              25                1.344  0.09    0.27   0.38   0.468  5.091
                150        37.5              38.2              25                1.365  0.09    0.27   0.375  0.463  4.533
                200        37.8              38.3              24.8              1.38   0.09    0.27   0.373  0.458  4.404
                200        37.2              38.8              24.2              1.391  0.09    0.27   0.372  0.453  4.667
                200        37                39.1              24                1.396  0.09    0.27   0.372  0.45   4.804
                200        37                39.3              24                1.395  0.09    0.27   0.372  0.45   4.804
                300        37                39.6              24                1.394  0.09    0.27   0.372  0.45   4.804
                300        37                39.9              24                1.393  0.09    0.27   0.372  0.45   4.804
                SoilCrop RiceSoil
                  LL=[0.263, 0.27, 0.271, 0.279, 0.291, 0.304, 0.318, 0.331, 0.348, 0.367]
                  KL=[0.06, 0.06, 0.06, 0.055, 0.048, 0.04, 0.032, 0.024, 0.014, 0.003]
                  XF=[1, 1, 1, 1, 1, 1, 1, 1, 1, 1]
                SoilCrop WheatSoil
                  LL=[0.263, 0.27, 0.271, 0.279, 0.291, 0.304, 0.318, 0.331, 0.348, 0.367]
                  KL=[0.06, 0.06, 0.06, 0.055, 0.048, 0.04, 0.032, 0.024, 0.014, 0.003]
                  XF=[1, 1, 1, 1, 1, 1, 1, 1, 1, 1]
                SoilCrop TeffSoil
                  LL=[0.263, 0.27, 0.271, 0.279, 0.291, 0.304, 0.318, 0.331, 0.348, 0.367]
                  KL=[0.06, 0.06, 0.06, 0.055, 0.048, 0.04, 0.032, 0.024, 0.014, 0.003]
                  XF=[1, 1, 1, 1, 1, 1, 1, 1, 1, 1]
                SoilCrop SugarcaneSoil
                  LL=[0.263, 0.27, 0.27, 0.275, 0.282, 0.29, 0.298, 0.305, 0.315, 0.327]
                  KL=[0.06, 0.06, 0.06, 0.057, 0.053, 0.048, 0.044, 0.039, 0.033, 0.027]
                  XF=[1, 1, 1, 1, 1, 1, 1, 1, 1, 1]
                SoilCrop MaizeSoil
                  LL=[0.263, 0.27, 0.271, 0.279, 0.291, 0.304, 0.318, 0.331, 0.348, 0.367]
                  KL=[0.06, 0.06, 0.06, 0.055, 0.048, 0.04, 0.032, 0.024, 0.014, 0.003]
                  XF=[1, 1, 1, 1, 1, 1, 1, 1, 1, 1]
                SoilCrop SoybeanSoil
                  LL=[0.263, 0.27, 0.271, 0.279, 0.291, 0.304, 0.318, 0.331, 0.348, 0.367]
                  KL=[0.06, 0.06, 0.06, 0.055, 0.048, 0.04, 0.032, 0.024, 0.014, 0.003]
                  XF=[1, 1, 1, 1, 1, 1, 1, 1, 1, 1]
                SoilCrop OilPalmSoil
                  LL=[0.263, 0.27, 0.27, 0.275, 0.282, 0.29, 0.298, 0.305, 0.315, 0.327]
                  KL=[0.06, 0.06, 0.06, 0.057, 0.053, 0.048, 0.044, 0.039, 0.033, 0.027]
                  XF=[1, 1, 1, 1, 1, 1, 1, 1, 1, 1]
                SoilCrop CassavaSoil
                  LL=[0.263, 0.27, 0.271, 0.279, 0.291, 0.304, 0.318, 0.331, 0.348, 0.367]
                  KL=[0.06, 0.06, 0.06, 0.055, 0.048, 0.04, 0.032, 0.024, 0.014, 0.003]
                  XF=[1, 1, 1, 1, 1, 1, 1, 1, 1, 1]
                SoilCrop PlantainForageSoil
                  LL=[0.263, 0.27, 0.27, 0.275, 0.282, 0.29, 0.298, 0.305, 0.315, 0.327]
                  KL=[0.06, 0.06, 0.06, 0.057, 0.053, 0.048, 0.044, 0.039, 0.033, 0.027]
                  XF=[1, 1, 1, 1, 1, 1, 1, 1, 1, 1]
                SoilCrop SunflowerSoil
                  LL=[0.264, 0.278, 0.288, 0.296, 0.306, 0.318, 0.33, 0.342, 0.357, 0.371]
                  KL=[0.1, 0.093, 0.084, 0.075, 0.065, 0.053, 0.041, 0.029, 0.015, 0.001]
                  XF=[1, 1, 1, 1, 1, 1, 1, 1, 1, 1]
                SoilCrop CanolaSoil
                  LL=[0.263, 0.27, 0.271, 0.279, 0.291, 0.304, 0.318, 0.331, 0.348, 0.367]
                  KL=[0.06, 0.06, 0.06, 0.055, 0.048, 0.04, 0.032, 0.024, 0.014, 0.003]
                  XF=[1, 1, 1, 1, 1, 1, 1, 1, 1, 1]
                SoilCrop SorghumSoil
                  LL=[0.263, 0.27, 0.27, 0.277, 0.285, 0.296, 0.306, 0.316, 0.329, 0.344]
                  KL=[0.07, 0.07, 0.07, 0.066, 0.06, 0.053, 0.045, 0.039, 0.03, 0.019]
                  XF=[1, 1, 1, 1, 1, 1, 1, 1, 1, 1]
                SoilCrop MilletSoil
                  LL=[0.263, 0.27, 0.27, 0.277, 0.285, 0.296, 0.306, 0.316, 0.329, 0.344]
                  KL=[0.07, 0.07, 0.07, 0.066, 0.06, 0.053, 0.045, 0.039, 0.03, 0.019]
                  XF=[1, 1, 1, 1, 1, 1, 1, 1, 1, 1]
                SoilCrop PeanutSoil
                  LL=[0.263, 0.27, 0.27, 0.27, 0.279, 0.296, 0.313, 0.33, 0.351, 0.37]
                  KL=[0.06, 0.06, 0.06, 0.06, 0.055, 0.045, 0.035, 0.025, 0.012, 0.001]
                  XF=[1, 1, 1, 1, 1, 1, 1, 1, 1, 1]
                SoilCrop BarleySoil
                  LL=[0.263, 0.27, 0.271, 0.278, 0.288, 0.3, 0.312, 0.324, 0.339, 0.357]
                  KL=[0.07, 0.07, 0.07, 0.065, 0.058, 0.049, 0.041, 0.033, 0.023, 0.01]
                  XF=[1, 1, 1, 1, 1, 1, 1, 1, 1, 1]
                SoilCrop CottonSoil
                  LL=[0.263, 0.27, 0.27, 0.27, 0.27, 0.276, 0.287, 0.298, 0.312, 0.329]
                  KL=[0.1, 0.1, 0.1, 0.1, 0.1, 0.094, 0.083, 0.072, 0.058, 0.042]
                  XF=[1, 1, 1, 1, 1, 1, 1, 1, 1, 1]
                SoilCrop OatsSoil
                  LL=[0.263, 0.27, 0.271, 0.279, 0.291, 0.304, 0.318, 0.331, 0.348, 0.367]
                  KL=[0.06, 0.06, 0.06, 0.055, 0.048, 0.04, 0.032, 0.024, 0.014, 0.003]
                  XF=[1, 1, 1, 1, 1, 1, 1, 1, 1, 1]
                SoilCrop ChickpeaSoil
                  LL=[0.263, 0.27, 0.27, 0.27, 0.278, 0.294, 0.309, 0.325, 0.344, 0.367]
                  KL=[0.06, 0.06, 0.06, 0.06, 0.055, 0.046, 0.037, 0.028, 0.016, 0.003]
                  XF=[1, 1, 1, 1, 1, 1, 1, 1, 1, 1]
                SoilCrop MungbeanSoil
                  LL=[0.263, 0.27, 0.27, 0.274, 0.291, 0.311, 0.331, 0.352, 0.37, 0.372]
                  KL=[0.06, 0.06, 0.06, 0.058, 0.048, 0.036, 0.024, 0.012, 0.001, 0]
                  XF=[1, 1, 1, 1, 1, 1, 1, 1, 1, 0]
                SoilCrop Pigeon PeaSoil
                  LL=[0.263, 0.27, 0.27, 0.27, 0.279, 0.296, 0.313, 0.33, 0.351, 0.37]
                  KL=[0.06, 0.06, 0.06, 0.06, 0.055, 0.045, 0.035, 0.025, 0.012, 0.001]
                  XF=[1, 1, 1, 1, 1, 1, 1, 1, 1, 1]
                SoilCrop CowpeaSoil
                  LL=[0.263, 0.27, 0.271, 0.279, 0.291, 0.304, 0.318, 0.331, 0.348, 0.367]
                  KL=[0.06, 0.06, 0.06, 0.055, 0.048, 0.04, 0.032, 0.024, 0.014, 0.003]
                  XF=[1, 1, 1, 1, 1, 1, 1, 1, 1, 1]
                SoilCrop FababeanSoil
                  LL=[0.263, 0.27, 0.27, 0.27, 0.272, 0.285, 0.299, 0.314, 0.332, 0.354]
                  KL=[0.08, 0.08, 0.08, 0.08, 0.079, 0.069, 0.057, 0.046, 0.031, 0.014]
                  XF=[1, 1, 1, 1, 1, 1, 1, 1, 1, 1]
                SoilCrop LucerneSoil
                  LL=[0.263, 0.27, 0.27, 0.27, 0.27, 0.27, 0.27, 0.271, 0.282, 0.295]
                  KL=[0.1, 0.1, 0.1, 0.1, 0.1, 0.1, 0.1, 0.099, 0.089, 0.075]
                  XF=[1, 1, 1, 1, 1, 1, 1, 1, 1, 1]
                SoilCrop LupinSoil
                  LL=[0.263, 0.27, 0.271, 0.279, 0.291, 0.304, 0.318, 0.331, 0.348, 0.367]
                  KL=[0.06, 0.06, 0.06, 0.055, 0.048, 0.04, 0.032, 0.024, 0.014, 0.003]
                  XF=[1, 1, 1, 1, 1, 1, 1, 1, 1, 1]
                SoilCrop LentilSoil
                  LL=[0.263, 0.27, 0.271, 0.279, 0.291, 0.304, 0.318, 0.331, 0.348, 0.367]
                  KL=[0.06, 0.06, 0.06, 0.055, 0.048, 0.04, 0.032, 0.024, 0.014, 0.003]
                  XF=[1, 1, 1, 1, 1, 1, 1, 1, 1, 1]
                SoilCrop TriticaleSoil
                  LL=[0.263, 0.27, 0.277, 0.291, 0.307, 0.326, 0.344, 0.363, 0.372, 0.372]
                  KL=[0.07, 0.07, 0.065, 0.056, 0.045, 0.032, 0.019, 0.006, 0, 0]
                  XF=[1, 1, 1, 1, 1, 1, 1, 1, 0, 0]
                SoilCrop EucalyptusSoil
                  LL=[0.263, 0.27, 0.27, 0.271, 0.272, 0.273, 0.274, 0.275, 0.276, 0.278]
                  KL=[0.08, 0.08, 0.08, 0.079, 0.079, 0.078, 0.077, 0.076, 0.075, 0.074]
                  XF=[1, 1, 1, 1, 1, 1, 1, 1, 1, 1]
                SoilCrop GliricidiaSoil
                  LL=[0.263, 0.27, 0.27, 0.271, 0.273, 0.275, 0.277, 0.28, 0.282, 0.285]
                  KL=[0.08, 0.08, 0.08, 0.079, 0.077, 0.076, 0.074, 0.072, 0.07, 0.068]
                  XF=[1, 1, 1, 1, 1, 1, 1, 1, 1, 1]
                SoilCrop PotatoSoil
                  LL=[0.22, 0.23, 0.243, 0.255, 0.268, 0.28, 0.292, 0.304, 0.32, 0.337]
                  KL=[0.06, 0.06, 0.06, 0.055, 0.048, 0.04, 0.032, 0.024, 0.014, 0.003]
                  XF=[1, 1, 1, 1, 1, 1, 1, 1, 1, 1]
              WaterBalance SoilWater: SummerDate=1-may; SummerU=6; SummerCona=6; WinterDate=1-oct; WinterU=6; WinterCona=6; DiffusConst=1271.55; DiffusSlope=14.28; Salb=0.13; CN2Bare=73; CNRed=20; CNCov=0; DischargeWidth=5; CatchmentArea=10; Thickness=[150, 150, 150, 150, 200, 200, 200, 200, 300, 300]
                SWCON=[0.267, 0.25, 0.242, 0.227, 0.185, 0.2, 0.208, 0.208, 0.154, 0.154]
              Organic: FOMCNRatio=40
                Thickness  Carbon  SoilCNRatio  FBiom  FInert  FOM
                150        0.984   8            0.04   0.522   133.417
                150        0.802   8            0.031  0.633   106.535
                150        0.668   8            0.014  0.752   85.0703
                150        0.566   8            0.01   0.873   67.93
                200        0.491   8            0.01   0.99    50.3238
                200        0.44    8            0.01   0.99    37.2808
                200        0.415   8            0.01   0.99    27.6183
                200        0.414   8            0.01   0.99    20.4601
                300        0.412   8            0.01   0.99    13.046
                300        0.41    8            0.01   0.99    8.31847
              Chemical
                Thickness  NO3N  NH4N  PH
                150        0     0     7.93
                150        0     0     8
                150        0     0     8.05
                150        0     0     8.15
                200        0     0     8.18
                200        0     0     8.12
                200        0     0     8.11
                200        0     0     8.13
                300        0     0     8.16
                300        0     0     8.19
              Nutrient
              CERESSoilTemperature Temperature
          CompositeFactor S2500_39425 594mm
            Specifications:
              [Soil]
              [Weather]
            Weather -2500_39425: FileName=%root%\Examples\WeatherFiles\-2500_39425.met
            Soil Synthetic Soil Derived from ISRIC SoilGrids: ASCOrder=NA; ASCSubOrder=NA; SoilType=Haplic Calcisols; Site=NA; NearestTown=NA; Region=NA; State=NA; Country=Kenya; NaturalVegetation=NA; ApsoilNumber=9999; Latitude=-2.625; Longitude=39.375; LocationAccuracy=+- 250 m; DataSource=ISRIC SoilGrids
              Sample Initial nitrogen: Thickness=[150, 150, 150, 150, 200, 200, 200, 200, 300, 300]; SWUnits=Volumetric; OCUnits=Total; PHUnits=Water
              InitialWater Initial water: PercentMethod=0; FractionFull=0
              Physical
                Thickness  ParticleSizeClay  ParticleSizeSand  ParticleSizeSilt  BD     AirDry  LL15   DUL    SAT    KS
                150        28.5              56.5              15.7              1.462  0.061   0.183  0.274  0.418  12.877
                150        32                53                15                1.489  0.065   0.195  0.281  0.41   8.58
                150        34.8              50.5              15                1.504  0.068   0.203  0.287  0.407  6.237
                150        36.2              49.5              15                1.516  0.069   0.207  0.288  0.403  5.241
                200        37                49                15                1.523  0.07    0.21   0.289  0.4    4.804
                200        37                49                15                1.524  0.07    0.21   0.289  0.4    4.804
                200        36.9              49                15                1.525  0.07    0.21   0.29   0.4    4.86
                200        36.7              49                15                1.525  0.07    0.21   0.291  0.4    4.974
                300        36.4              49                15                1.524  0.07    0.21   0.294  0.4    5.121
                300        36.1              49                15                1.524  0.07    0.21   0.296  0.4    5.302
                SoilCrop RiceSoil
                  LL=[0.183, 0.195, 0.203, 0.214, 0.226, 0.237, 0.248, 0.26, 0.276, 0.294]
                  KL=[0.06, 0.06, 0.06, 0.055, 0.048, 0.039, 0.031, 0.023, 0.012, 0.002]
                  XF=[1, 1, 1, 0.987, 0.966, 0.963, 0.961, 0.963, 0.965, 0.967]
                SoilCrop WheatSoil
                  LL=[0.183, 0.195, 0.203, 0.214, 0.226, 0.237, 0.248, 0.26, 0.276, 0.294]
                  KL=[0.06, 0.06, 0.06, 0.055, 0.048, 0.039, 0.031, 0.023, 0.012, 0.002]
                  XF=[1, 1, 1, 0.987, 0.966, 0.963, 0.961, 0.963, 0.965, 0.967]
                SoilCrop TeffSoil
                  LL=[0.183, 0.195, 0.203, 0.214, 0.226, 0.237, 0.248, 0.26, 0.276, 0.294]
                  KL=[0.06, 0.06, 0.06, 0.055, 0.048, 0.039, 0.031, 0.023, 0.012, 0.002]
                  XF=[1, 1, 1, 0.987, 0.966, 0.963, 0.961, 0.963, 0.965, 0.967]
                SoilCrop SugarcaneSoil
                  LL=[0.183, 0.195, 0.203, 0.211, 0.219, 0.226, 0.232, 0.239, 0.248, 0.26]
                  KL=[0.06, 0.06, 0.06, 0.057, 0.053, 0.048, 0.043, 0.039, 0.033, 0.025]
                  XF=[1, 1, 1, 0.987, 0.966, 0.963, 0.961, 0.963, 0.965, 0.967]
                SoilCrop MaizeSoil
                  LL=[0.183, 0.195, 0.203, 0.214, 0.226, 0.237, 0.248, 0.26, 0.276, 0.294]
                  KL=[0.06, 0.06, 0.06, 0.055, 0.048, 0.039, 0.031, 0.023, 0.012, 0.002]
                  XF=[1, 1, 1, 0.987, 0.966, 0.963, 0.961, 0.963, 0.965, 0.967]
                SoilCrop SoybeanSoil
                  LL=[0.183, 0.195, 0.203, 0.214, 0.226, 0.237, 0.248, 0.26, 0.276, 0.294]
                  KL=[0.06, 0.06, 0.06, 0.055, 0.048, 0.039, 0.031, 0.023, 0.012, 0.002]
                  XF=[1, 1, 1, 0.987, 0.966, 0.963, 0.961, 0.963, 0.965, 0.967]
                SoilCrop OilPalmSoil
                  LL=[0.183, 0.195, 0.203, 0.211, 0.219, 0.226, 0.232, 0.239, 0.248, 0.26]
                  KL=[0.06, 0.06, 0.06, 0.057, 0.053, 0.048, 0.043, 0.039, 0.033, 0.025]
                  XF=[1, 1, 1, 0.987, 0.966, 0.963, 0.961, 0.963, 0.965, 0.967]
                SoilCrop CassavaSoil
                  LL=[0.183, 0.195, 0.203, 0.214, 0.226, 0.237, 0.248, 0.26, 0.276, 0.294]
                  KL=[0.06, 0.06, 0.06, 0.055, 0.048, 0.039, 0.031, 0.023, 0.012, 0.002]
                  XF=[1, 1, 1, 0.987, 0.966, 0.963, 0.961, 0.963, 0.965, 0.967]
                SoilCrop PlantainForageSoil
                  LL=[0.183, 0.195, 0.203, 0.211, 0.219, 0.226, 0.232, 0.239, 0.248, 0.26]
                  KL=[0.06, 0.06, 0.06, 0.057, 0.053, 0.048, 0.043, 0.039, 0.033, 0.025]
                  XF=[1, 1, 1, 0.987, 0.966, 0.963, 0.961, 0.963, 0.965, 0.967]
                SoilCrop SunflowerSoil
                  LL=[0.184, 0.201, 0.216, 0.228, 0.238, 0.248, 0.258, 0.269, 0.283, 0.296]
                  KL=[0.1, 0.093, 0.084, 0.075, 0.064, 0.052, 0.04, 0.028, 0.012, 0]
                  XF=[1, 1, 1, 0.987, 0.966, 0.963, 0.961, 0.963, 0.965, 0.967]
                SoilCrop CanolaSoil
                  LL=[0.183, 0.195, 0.203, 0.214, 0.226, 0.237, 0.248, 0.26, 0.276, 0.294]
                  KL=[0.06, 0.06, 0.06, 0.055, 0.048, 0.039, 0.031, 0.023, 0.012, 0.002]
                  XF=[1, 1, 1, 0.987, 0.966, 0.963, 0.961, 0.963, 0.965, 0.967]
                SoilCrop SorghumSoil
                  LL=[0.183, 0.195, 0.203, 0.213, 0.222, 0.23, 0.239, 0.248, 0.26, 0.275]
                  KL=[0.07, 0.07, 0.07, 0.066, 0.059, 0.052, 0.045, 0.037, 0.028, 0.018]
                  XF=[1, 1, 1, 0.987, 0.966, 0.963, 0.961, 0.963, 0.965, 0.967]
                SoilCrop MilletSoil
                  LL=[0.183, 0.195, 0.203, 0.213, 0.222, 0.23, 0.239, 0.248, 0.26, 0.275]
                  KL=[0.07, 0.07, 0.07, 0.066, 0.059, 0.052, 0.045, 0.037, 0.028, 0.018]
                  XF=[1, 1, 1, 0.987, 0.966, 0.963, 0.961, 0.963, 0.965, 0.967]
                SoilCrop PeanutSoil
                  LL=[0.183, 0.195, 0.203, 0.208, 0.217, 0.231, 0.245, 0.259, 0.279, 0.296]
                  KL=[0.06, 0.06, 0.06, 0.06, 0.055, 0.044, 0.034, 0.024, 0.011, 0]
                  XF=[1, 1, 1, 0.987, 0.966, 0.963, 0.961, 0.963, 0.965, 0.967]
                SoilCrop BarleySoil
                  LL=[0.183, 0.195, 0.203, 0.213, 0.224, 0.234, 0.244, 0.254, 0.268, 0.286]
                  KL=[0.07, 0.07, 0.07, 0.065, 0.057, 0.049, 0.04, 0.032, 0.021, 0.008]
                  XF=[1, 1, 1, 0.987, 0.966, 0.963, 0.961, 0.963, 0.965, 0.967]
                SoilCrop CottonSoil
                  LL=[0.183, 0.195, 0.203, 0.208, 0.21, 0.215, 0.224, 0.234, 0.247, 0.263]
                  KL=[0.1, 0.1, 0.1, 0.1, 0.1, 0.094, 0.082, 0.071, 0.056, 0.039]
                  XF=[1, 1, 1, 0.987, 0.966, 0.963, 0.961, 0.963, 0.965, 0.967]
                SoilCrop OatsSoil
                  LL=[0.183, 0.195, 0.203, 0.214, 0.226, 0.237, 0.248, 0.26, 0.276, 0.294]
                  KL=[0.06, 0.06, 0.06, 0.055, 0.048, 0.039, 0.031, 0.023, 0.012, 0.002]
                  XF=[1, 1, 1, 0.987, 0.966, 0.963, 0.961, 0.963, 0.965, 0.967]
                SoilCrop ChickpeaSoil
                  LL=[0.183, 0.195, 0.203, 0.208, 0.216, 0.229, 0.242, 0.256, 0.273, 0.294]
                  KL=[0.06, 0.06, 0.06, 0.06, 0.055, 0.046, 0.036, 0.026, 0.014, 0.002]
                  XF=[1, 1, 1, 0.987, 0.966, 0.963, 0.961, 0.963, 0.965, 0.967]
                SoilCrop MungbeanSoil
                  LL=[0.183, 0.195, 0.203, 0.21, 0.226, 0.243, 0.259, 0.277, 0.293, 0.296]
                  KL=[0.06, 0.06, 0.06, 0.058, 0.048, 0.035, 0.023, 0.01, 0, 0]
                  XF=[1, 1, 1, 0.987, 0.966, 0.963, 0.961, 0.963, 0.965, 0]
                SoilCrop Pigeon PeaSoil
                  LL=[0.183, 0.195, 0.203, 0.208, 0.217, 0.231, 0.245, 0.259, 0.279, 0.296]
                  KL=[0.06, 0.06, 0.06, 0.06, 0.055, 0.044, 0.034, 0.024, 0.011, 0]
                  XF=[1, 1, 1, 0.987, 0.966, 0.963, 0.961, 0.963, 0.965, 0.967]
                SoilCrop CowpeaSoil
                  LL=[0.183, 0.195, 0.203, 0.214, 0.226, 0.237, 0.248, 0.26, 0.276, 0.294]
                  KL=[0.06, 0.06, 0.06, 0.055, 0.048, 0.039, 0.031, 0.023, 0.012, 0.002]
                  XF=[1, 1, 1, 0.987, 0.966, 0.963, 0.961, 0.963, 0.965, 0.967]
                SoilCrop FababeanSoil
                  LL=[0.183, 0.195, 0.203, 0.208, 0.212, 0.222, 0.234, 0.247, 0.263, 0.284]
                  KL=[0.08, 0.08, 0.08, 0.08, 0.078, 0.068, 0.056, 0.044, 0.029, 0.012]
                  XF=[1, 1, 1, 0.987, 0.966, 0.963, 0.961, 0.963, 0.965, 0.967]
                SoilCrop LucerneSoil
                  LL=[0.183, 0.195, 0.203, 0.208, 0.21, 0.21, 0.21, 0.212, 0.221, 0.233]
                  KL=[0.1, 0.1, 0.1, 0.1, 0.1, 0.1, 0.1, 0.098, 0.087, 0.073]
                  XF=[1, 1, 1, 0.987, 0.966, 0.963, 0.961, 0.963, 0.965, 0.967]
                SoilCrop LupinSoil
                  LL=[0.183, 0.195, 0.203, 0.214, 0.226, 0.237, 0.248, 0.26, 0.276, 0.294]
                  KL=[0.06, 0.06, 0.06, 0.055, 0.048, 0.039, 0.031, 0.023, 0.012, 0.002]
                  XF=[1, 1, 1, 0.987, 0.966, 0.963, 0.961, 0.963, 0.965, 0.967]
                SoilCrop LentilSoil
                  LL=[0.183, 0.195, 0.203, 0.214, 0.226, 0.237, 0.248, 0.26, 0.276, 0.294]
                  KL=[0.06, 0.06, 0.06, 0.055, 0.048, 0.039, 0.031, 0.023, 0.012, 0.002]
                  XF=[1, 1, 1, 0.987, 0.966, 0.963, 0.961, 0.963, 0.965, 0.967]
                SoilCrop TriticaleSoil
                  LL=[0.183, 0.195, 0.208, 0.224, 0.239, 0.254, 0.269, 0.286, 0.294, 0.296]
                  KL=[0.07, 0.07, 0.065, 0.056, 0.044, 0.031, 0.018, 0.005, 0, 0]
                  XF=[1, 1, 1, 0.987, 0.966, 0.963, 0.961, 0.963, 0, 0]
                SoilCrop EucalyptusSoil
                  LL=[0.183, 0.195, 0.203, 0.208, 0.211, 0.212, 0.213, 0.214, 0.215, 0.217]
                  KL=[0.08, 0.08, 0.08, 0.079, 0.079, 0.078, 0.077, 0.076, 0.075, 0.074]
                  XF=[1, 1, 1, 0.987, 0.966, 0.963, 0.961, 0.963, 0.965, 0.967]
                SoilCrop GliricidiaSoil
                  LL=[0.183, 0.195, 0.203, 0.209, 0.213, 0.214, 0.216, 0.218, 0.22, 0.223]
                  KL=[0.08, 0.08, 0.08, 0.079, 0.077, 0.076, 0.074, 0.072, 0.07, 0.068]
                  XF=[1, 1, 1, 0.987, 0.966, 0.963, 0.961, 0.963, 0.965, 0.967]
                SoilCrop PotatoSoil
                  LL=[0.274, 0.281, 0.287, 0.288, 0.289, 0.289, 0.29, 0.291, 0.294, 0.296]
                  KL=[0.06, 0.06, 0.06, 0.055, 0.048, 0.04, 0.032, 0.024, 0.014, 0.003]
                  XF=[1, 1, 1, 1, 1, 1, 1, 1, 1, 1]
              WaterBalance SoilWater: SummerDate=1-nov; SummerU=6; SummerCona=6; WinterDate=1-apr; WinterU=6; WinterCona=6; DiffusConst=12129.92; DiffusSlope=-3.3; Salb=0.13; CN2Bare=73; CNRed=20; CNCov=0; DischargeWidth=5; CatchmentArea=10; Thickness=[150, 150, 150, 150, 200, 200, 200, 200, 300, 300]
                SWCON=[0.301, 0.259, 0.225, 0.209, 0.162, 0.162, 0.165, 0.169, 0.128, 0.134]
              Organic: FOMCNRatio=40
                Thickness  Carbon  SoilCNRatio  FBiom  FInert  FOM
                150        0.398   9.6          0.04   0.931   133.417
                150        0.39    9.6          0.031  0.934   106.535
                150        0.409   9.6          0.014  0.88    85.0703
                150        0.386   9.6          0.01   0.926   67.93
                200        0.358   9.6          0.01   0.99    50.3238
                200        0.325   9.6          0.01   0.99    37.2808
                200        0.308   9.6          0.01   0.99    27.6183
                200        0.306   9.6          0.01   0.99    20.4601
                300        0.305   9.6          0.01   0.99    13.046
                300        0.303   9.6          0.01   0.99    8.31847
              Chemical
                Thickness  NO3N  NH4N  PH
                150        0     0     7.5
                150        0     0     7.5
                150        0     0     7.53
                150        0     0     7.58
                200        0     0     7.62
                200        0     0     7.68
                200        0     0     7.7
                200        0     0     7.7
                300        0     0     7.7
                300        0     0     7.7
              Nutrient
              CERESSoilTemperature Temperature
          CompositeFactor S1375_37985 768mm
            Specifications:
              [Soil]
              [Weather]
            Weather -1375_37985: FileName=%root%\Examples\WeatherFiles\-1375_37985.met
            Soil Synthetic Soil Derived from ISRIC SoilGrids: ASCOrder=NA; ASCSubOrder=NA; SoilType=Haplic Lixisols; Site=NA; NearestTown=NA; Region=NA; State=NA; Country=Kenya; NaturalVegetation=NA; ApsoilNumber=9999; Latitude=-1.375; Longitude=37.875; LocationAccuracy=+- 250 m; DataSource=ISRIC SoilGrids
              Sample Initial nitrogen: Thickness=[150, 150, 150, 150, 200, 200, 200, 200, 300, 300]; SWUnits=Volumetric; OCUnits=Total; PHUnits=Water
              InitialWater Initial water: PercentMethod=0; FractionFull=0
              Physical
                Thickness  ParticleSizeClay  ParticleSizeSand  ParticleSizeSilt  BD     AirDry  LL15   DUL    SAT    KS
                150        35.5              50.3              14.7              1.341  0.073   0.22   0.314  0.452  5.717
                150        39                47                13.5              1.349  0.077   0.23   0.319  0.455  3.809
                150        41.8              44.2              13.2              1.345  0.081   0.242  0.332  0.46   2.769
                150        43.2              42.8              13.8              1.338  0.082   0.247  0.338  0.46   2.327
                200        44                42                14                1.336  0.083   0.25   0.341  0.46   2.133
                200        44                42                14                1.338  0.083   0.25   0.341  0.46   2.133
                200        44                42                14                1.339  0.083   0.25   0.341  0.46   2.133
                200        44                42                14                1.339  0.083   0.25   0.341  0.46   2.133
                300        44                42                14                1.339  0.083   0.25   0.341  0.46   2.133
                300        44                42                14                1.339  0.083   0.25   0.341  0.46   2.133
                SoilCrop RiceSoil
                  LL=[0.22, 0.23, 0.243, 0.255, 0.268, 0.28, 0.292, 0.304, 0.32, 0.337]
                  KL=[0.06, 0.06, 0.06, 0.055, 0.048, 0.04, 0.032, 0.024, 0.014, 0.003]
                  XF=[1, 1, 1, 1, 1, 1, 1, 1, 1, 1]
                SoilCrop WheatSoil
                  LL=[0.22, 0.23, 0.243, 0.255, 0.268, 0.28, 0.292, 0.304, 0.32, 0.337]
                  KL=[0.06, 0.06, 0.06, 0.055, 0.048, 0.04, 0.032, 0.024, 0.014, 0.003]
                  XF=[1, 1, 1, 1, 1, 1, 1, 1, 1, 1]
                SoilCrop TeffSoil
                  LL=[0.22, 0.23, 0.243, 0.255, 0.268, 0.28, 0.292, 0.304, 0.32, 0.337]
                  KL=[0.06, 0.06, 0.06, 0.055, 0.048, 0.04, 0.032, 0.024, 0.014, 0.003]
                  XF=[1, 1, 1, 1, 1, 1, 1, 1, 1, 1]
                SoilCrop SugarcaneSoil
                  LL=[0.22, 0.23, 0.243, 0.252, 0.26, 0.267, 0.274, 0.281, 0.29, 0.301]
                  KL=[0.06, 0.06, 0.06, 0.057, 0.053, 0.048, 0.044, 0.039, 0.033, 0.027]
                  XF=[1, 1, 1, 1, 1, 1, 1, 1, 1, 1]
                SoilCrop MaizeSoil
                  LL=[0.22, 0.23, 0.243, 0.255, 0.268, 0.28, 0.292, 0.304, 0.32, 0.337]
                  KL=[0.06, 0.06, 0.06, 0.055, 0.048, 0.04, 0.032, 0.024, 0.014, 0.003]
                  XF=[1, 1, 1, 1, 1, 1, 1, 1, 1, 1]
                SoilCrop SoybeanSoil
                  LL=[0.22, 0.23, 0.243, 0.255, 0.268, 0.28, 0.292, 0.304, 0.32, 0.337]
                  KL=[0.06, 0.06, 0.06, 0.055, 0.048, 0.04, 0.032, 0.024, 0.014, 0.003]
                  XF=[1, 1, 1, 1, 1, 1, 1, 1, 1, 1]
                SoilCrop OilPalmSoil
                  LL=[0.22, 0.23, 0.243, 0.252, 0.26, 0.267, 0.274, 0.281, 0.29, 0.301]
                  KL=[0.06, 0.06, 0.06, 0.057, 0.053, 0.048, 0.044, 0.039, 0.033, 0.027]
                  XF=[1, 1, 1, 1, 1, 1, 1, 1, 1, 1]
                SoilCrop CassavaSoil
                  LL=[0.22, 0.23, 0.243, 0.255, 0.268, 0.28, 0.292, 0.304, 0.32, 0.337]
                  KL=[0.06, 0.06, 0.06, 0.055, 0.048, 0.04, 0.032, 0.024, 0.014, 0.003]
                  XF=[1, 1, 1, 1, 1, 1, 1, 1, 1, 1]
                SoilCrop PlantainForageSoil
                  LL=[0.22, 0.23, 0.243, 0.252, 0.26, 0.267, 0.274, 0.281, 0.29, 0.301]
                  KL=[0.06, 0.06, 0.06, 0.057, 0.053, 0.048, 0.044, 0.039, 0.033, 0.027]
                  XF=[1, 1, 1, 1, 1, 1, 1, 1, 1, 1]
                SoilCrop SunflowerSoil
                  LL=[0.22, 0.237, 0.257, 0.27, 0.282, 0.293, 0.303, 0.314, 0.327, 0.34]
                  KL=[0.1, 0.093, 0.084, 0.075, 0.065, 0.053, 0.041, 0.029, 0.015, 0.001]
                  XF=[1, 1, 1, 1, 1, 1, 1, 1, 1, 1]
                SoilCrop CanolaSoil
                  LL=[0.22, 0.23, 0.243, 0.255, 0.268, 0.28, 0.292, 0.304, 0.32, 0.337]
                  KL=[0.06, 0.06, 0.06, 0.055, 0.048, 0.04, 0.032, 0.024, 0.014, 0.003]
                  XF=[1, 1, 1, 1, 1, 1, 1, 1, 1, 1]
                SoilCrop SorghumSoil
                  LL=[0.22, 0.23, 0.243, 0.253, 0.264, 0.273, 0.282, 0.291, 0.302, 0.316]
                  KL=[0.07, 0.07, 0.07, 0.066, 0.06, 0.053, 0.045, 0.039, 0.03, 0.019]
                  XF=[1, 1, 1, 1, 1, 1, 1, 1, 1, 1]
                SoilCrop MilletSoil
                  LL=[0.22, 0.23, 0.243, 0.253, 0.264, 0.273, 0.282, 0.291, 0.302, 0.316]
                  KL=[0.07, 0.07, 0.07, 0.066, 0.06, 0.053, 0.045, 0.039, 0.03, 0.019]
                  XF=[1, 1, 1, 1, 1, 1, 1, 1, 1, 1]
                SoilCrop PeanutSoil
                  LL=[0.22, 0.23, 0.242, 0.247, 0.258, 0.273, 0.288, 0.303, 0.322, 0.339]
                  KL=[0.06, 0.06, 0.06, 0.06, 0.055, 0.045, 0.035, 0.025, 0.012, 0.001]
                  XF=[1, 1, 1, 1, 1, 1, 1, 1, 1, 1]
                SoilCrop BarleySoil
                  LL=[0.22, 0.23, 0.243, 0.254, 0.266, 0.277, 0.287, 0.298, 0.311, 0.327]
                  KL=[0.07, 0.07, 0.07, 0.065, 0.058, 0.049, 0.041, 0.033, 0.023, 0.01]
                  XF=[1, 1, 1, 1, 1, 1, 1, 1, 1, 1]
                SoilCrop CottonSoil
                  LL=[0.22, 0.23, 0.242, 0.247, 0.25, 0.255, 0.265, 0.275, 0.288, 0.303]
                  KL=[0.1, 0.1, 0.1, 0.1, 0.1, 0.094, 0.083, 0.072, 0.058, 0.042]
                  XF=[1, 1, 1, 1, 1, 1, 1, 1, 1, 1]
                SoilCrop OatsSoil
                  LL=[0.22, 0.23, 0.243, 0.255, 0.268, 0.28, 0.292, 0.304, 0.32, 0.337]
                  KL=[0.06, 0.06, 0.06, 0.055, 0.048, 0.04, 0.032, 0.024, 0.014, 0.003]
                  XF=[1, 1, 1, 1, 1, 1, 1, 1, 1, 1]
                SoilCrop ChickpeaSoil
                  LL=[0.22, 0.23, 0.242, 0.247, 0.257, 0.271, 0.285, 0.299, 0.316, 0.336]
                  KL=[0.06, 0.06, 0.06, 0.06, 0.055, 0.046, 0.037, 0.028, 0.016, 0.003]
                  XF=[1, 1, 1, 1, 1, 1, 1, 1, 1, 1]
                SoilCrop MungbeanSoil
                  LL=[0.22, 0.23, 0.242, 0.251, 0.268, 0.286, 0.304, 0.323, 0.339, 0.341]
                  KL=[0.06, 0.06, 0.06, 0.058, 0.048, 0.036, 0.024, 0.012, 0.001, 0]
                  XF=[1, 1, 1, 1, 1, 1, 1, 1, 1, 0]
                SoilCrop Pigeon PeaSoil
                  LL=[0.22, 0.23, 0.242, 0.247, 0.258, 0.273, 0.288, 0.303, 0.322, 0.339]
                  KL=[0.06, 0.06, 0.06, 0.06, 0.055, 0.045, 0.035, 0.025, 0.012, 0.001]
                  XF=[1, 1, 1, 1, 1, 1, 1, 1, 1, 1]
                SoilCrop CowpeaSoil
                  LL=[0.22, 0.23, 0.243, 0.255, 0.268, 0.28, 0.292, 0.304, 0.32, 0.337]
                  KL=[0.06, 0.06, 0.06, 0.055, 0.048, 0.04, 0.032, 0.024, 0.014, 0.003]
                  XF=[1, 1, 1, 1, 1, 1, 1, 1, 1, 1]
                SoilCrop FababeanSoil
                  LL=[0.22, 0.23, 0.242, 0.247, 0.252, 0.263, 0.276, 0.289, 0.305, 0.325]
                  KL=[0.08, 0.08, 0.08, 0.08, 0.079, 0.069, 0.057, 0.046, 0.031, 0.014]
                  XF=[1, 1, 1, 1, 1, 1, 1, 1, 1, 1]
                SoilCrop LucerneSoil
                  LL=[0.22, 0.23, 0.242, 0.247, 0.25, 0.25, 0.25, 0.251, 0.26, 0.273]
                  KL=[0.1, 0.1, 0.1, 0.1, 0.1, 0.1, 0.1, 0.099, 0.089, 0.075]
                  XF=[1, 1, 1, 1, 1, 1, 1, 1, 1, 1]
                SoilCrop LupinSoil
                  LL=[0.22, 0.23, 0.243, 0.255, 0.268, 0.28, 0.292, 0.304, 0.32, 0.337]
                  KL=[0.06, 0.06, 0.06, 0.055, 0.048, 0.04, 0.032, 0.024, 0.014, 0.003]
                  XF=[1, 1, 1, 1, 1, 1, 1, 1, 1, 1]
                SoilCrop LentilSoil
                  LL=[0.22, 0.23, 0.243, 0.255, 0.268, 0.28, 0.292, 0.304, 0.32, 0.337]
                  KL=[0.06, 0.06, 0.06, 0.055, 0.048, 0.04, 0.032, 0.024, 0.014, 0.003]
                  XF=[1, 1, 1, 1, 1, 1, 1, 1, 1, 1]
                SoilCrop TriticaleSoil
                  LL=[0.22, 0.23, 0.249, 0.266, 0.283, 0.299, 0.316, 0.332, 0.341, 0.341]
                  KL=[0.07, 0.07, 0.065, 0.056, 0.045, 0.032, 0.019, 0.006, 0, 0]
                  XF=[1, 1, 1, 1, 1, 1, 1, 1, 0, 0]
                SoilCrop EucalyptusSoil
                  LL=[0.22, 0.23, 0.243, 0.248, 0.251, 0.252, 0.253, 0.254, 0.255, 0.257]
                  KL=[0.08, 0.08, 0.08, 0.079, 0.079, 0.078, 0.077, 0.076, 0.075, 0.074]
                  XF=[1, 1, 1, 1, 1, 1, 1, 1, 1, 1]
                SoilCrop GliricidiaSoil
                  LL=[0.22, 0.23, 0.243, 0.249, 0.253, 0.255, 0.257, 0.259, 0.261, 0.264]
                  KL=[0.08, 0.08, 0.08, 0.079, 0.077, 0.076, 0.074, 0.072, 0.07, 0.068]
                  XF=[1, 1, 1, 1, 1, 1, 1, 1, 1, 1]
                SoilCrop PotatoSoil
                  LL=[0.22, 0.23, 0.243, 0.255, 0.268, 0.28, 0.292, 0.304, 0.32, 0.337]
                  KL=[0.06, 0.06, 0.06, 0.055, 0.048, 0.04, 0.032, 0.024, 0.014, 0.003]
                  XF=[1, 1, 1, 1, 1, 1, 1, 1, 1, 1]
              WaterBalance SoilWater: SummerDate=1-nov; SummerU=6; SummerCona=6; WinterDate=1-apr; WinterU=6; WinterCona=6; DiffusConst=25886.95; DiffusSlope=-12.47; Salb=0.12; CN2Bare=73; CNRed=20; CNCov=0; DischargeWidth=5; CatchmentArea=10; Thickness=[150, 150, 150, 150, 200, 200, 200, 200, 300, 300]
                SWCON=[0.194, 0.147, 0.121, 0.109, 0.08, 0.08, 0.08, 0.08, 0.055, 0.055]
              Organic: FOMCNRatio=40
                Thickness  Carbon  SoilCNRatio  FBiom  FInert  FOM
                150        1.339   8            0.04   0.423   97.0304
                150        0.96    8            0.031  0.587   77.4803
                150        0.773   8            0.014  0.731   61.8693
                150        0.658   8            0.01   0.864   49.4036
                200        0.552   8            0.01   0.99    36.5991
                200        0.458   8            0.01   0.99    27.1133
                200        0.405   8            0.01   0.99    20.086
                200        0.393   8            0.01   0.99    14.8801
                300        0.378   8            0.01   0.99    9.48797
                300        0.36    8            0.01   0.99    6.04979
              Chemical
                Thickness  NO3N  NH4N  PH
                150        0     0     6.2
                150        0     0     6.2
                150        0     0     6.2
                150        0     0     6.2
                200        0     0     6.2
                200        0     0     6.2
                200        0     0     6.21
                200        0     0     6.23
                300        0     0     6.26
                300        0     0     6.29
              Nutrient
              CERESSoilTemperature Temperature
          CompositeFactor S225_36025 1087mm
            Specifications:
              [Soil]
              [Weather]
            Weather -225_36025: FileName=%root%\Examples\WeatherFiles\-225_36025.met
            Soil Synthetic Soil Derived from ISRIC SoilGrids: ASCOrder=NA; ASCSubOrder=NA; SoilType=Haplic Vertisols; Site=NA; NearestTown=NA; Region=NA; State=NA; Country=Kenya; NaturalVegetation=NA; ApsoilNumber=9999; Latitude=-0.125; Longitude=36.125; LocationAccuracy=+- 250 m; DataSource=ISRIC SoilGrids
              Sample Initial nitrogen: Thickness=[150, 150, 150, 150, 200, 200, 200, 200, 300, 300]; SWUnits=Volumetric; OCUnits=Total; PHUnits=Water
              InitialWater Initial water: PercentMethod=0; FractionFull=0
              Physical
                Thickness  ParticleSizeClay  ParticleSizeSand  ParticleSizeSilt  BD     AirDry  LL15  DUL    SAT    KS
                150        40.7              32.5              27.7              1.176  0.097   0.29  0.418  0.522  3.14
                150        42.5              31.5              27                1.207  0.097   0.29  0.412  0.515  2.538
                150        43.8              30.5              26.8              1.219  0.097   0.29  0.408  0.51   2.196
                150        45.2              29.5              26.2              1.224  0.097   0.29  0.408  0.51   1.845
                200        46                29.2              25.8              1.231  0.097   0.29  0.408  0.508  1.691
                200        46                29.8              25.2              1.238  0.097   0.29  0.407  0.502  1.691
                200        45.9              30                25                1.244  0.097   0.29  0.407  0.5    1.711
                200        45.7              30                25                1.247  0.097   0.29  0.407  0.5    1.751
                300        45.5              30                25                1.252  0.097   0.29  0.407  0.5    1.803
                300        45.1              30                25                1.257  0.097   0.29  0.407  0.5    1.867
                SoilCrop RiceSoil
                  LL=[0.29, 0.29, 0.291, 0.3, 0.314, 0.329, 0.345, 0.36, 0.38, 0.402]
                  KL=[0.06, 0.06, 0.06, 0.055, 0.048, 0.04, 0.032, 0.024, 0.014, 0.003]
                  XF=[1, 1, 1, 1, 1, 1, 1, 1, 1, 1]
                SoilCrop WheatSoil
                  LL=[0.29, 0.29, 0.291, 0.3, 0.314, 0.329, 0.345, 0.36, 0.38, 0.402]
                  KL=[0.06, 0.06, 0.06, 0.055, 0.048, 0.04, 0.032, 0.024, 0.014, 0.003]
                  XF=[1, 1, 1, 1, 1, 1, 1, 1, 1, 1]
                SoilCrop TeffSoil
                  LL=[0.29, 0.29, 0.291, 0.3, 0.314, 0.329, 0.345, 0.36, 0.38, 0.402]
                  KL=[0.06, 0.06, 0.06, 0.055, 0.048, 0.04, 0.032, 0.024, 0.014, 0.003]
                  XF=[1, 1, 1, 1, 1, 1, 1, 1, 1, 1]
                SoilCrop SugarcaneSoil
                  LL=[0.29, 0.29, 0.29, 0.296, 0.304, 0.313, 0.322, 0.331, 0.342, 0.355]
                  KL=[0.06, 0.06, 0.06, 0.057, 0.053, 0.048, 0.044, 0.039, 0.033, 0.027]
                  XF=[1, 1, 1, 1, 1, 1, 1, 1, 1, 1]
                SoilCrop MaizeSoil
                  LL=[0.29, 0.29, 0.291, 0.3, 0.314, 0.329, 0.345, 0.36, 0.38, 0.402]
                  KL=[0.06, 0.06, 0.06, 0.055, 0.048, 0.04, 0.032, 0.024, 0.014, 0.003]
                  XF=[1, 1, 1, 1, 1, 1, 1, 1, 1, 1]
                SoilCrop SoybeanSoil
                  LL=[0.29, 0.29, 0.291, 0.3, 0.314, 0.329, 0.345, 0.36, 0.38, 0.402]
                  KL=[0.06, 0.06, 0.06, 0.055, 0.048, 0.04, 0.032, 0.024, 0.014, 0.003]
                  XF=[1, 1, 1, 1, 1, 1, 1, 1, 1, 1]
                SoilCrop OilPalmSoil
                  LL=[0.29, 0.29, 0.29, 0.296, 0.304, 0.313, 0.322, 0.331, 0.342, 0.355]
                  KL=[0.06, 0.06, 0.06, 0.057, 0.053, 0.048, 0.044, 0.039, 0.033, 0.027]
                  XF=[1, 1, 1, 1, 1, 1, 1, 1, 1, 1]
                SoilCrop CassavaSoil
                  LL=[0.29, 0.29, 0.291, 0.3, 0.314, 0.329, 0.345, 0.36, 0.38, 0.402]
                  KL=[0.06, 0.06, 0.06, 0.055, 0.048, 0.04, 0.032, 0.024, 0.014, 0.003]
                  XF=[1, 1, 1, 1, 1, 1, 1, 1, 1, 1]
                SoilCrop PlantainForageSoil
                  LL=[0.29, 0.29, 0.29, 0.296, 0.304, 0.313, 0.322, 0.331, 0.342, 0.355]
                  KL=[0.06, 0.06, 0.06, 0.057, 0.053, 0.048, 0.044, 0.039, 0.033, 0.027]
                  XF=[1, 1, 1, 1, 1, 1, 1, 1, 1, 1]
                SoilCrop SunflowerSoil
                  LL=[0.291, 0.299, 0.309, 0.319, 0.331, 0.345, 0.359, 0.373, 0.39, 0.406]
                  KL=[0.1, 0.093, 0.084, 0.075, 0.065, 0.053, 0.041, 0.029, 0.015, 0.001]
                  XF=[1, 1, 1, 1, 1, 1, 1, 1, 1, 1]
                SoilCrop CanolaSoil
                  LL=[0.29, 0.29, 0.291, 0.3, 0.314, 0.329, 0.345, 0.36, 0.38, 0.402]
                  KL=[0.06, 0.06, 0.06, 0.055, 0.048, 0.04, 0.032, 0.024, 0.014, 0.003]
                  XF=[1, 1, 1, 1, 1, 1, 1, 1, 1, 1]
                SoilCrop SorghumSoil
                  LL=[0.29, 0.29, 0.29, 0.297, 0.308, 0.319, 0.331, 0.343, 0.357, 0.375]
                  KL=[0.07, 0.07, 0.07, 0.066, 0.06, 0.053, 0.045, 0.039, 0.03, 0.019]
                  XF=[1, 1, 1, 1, 1, 1, 1, 1, 1, 1]
                SoilCrop MilletSoil
                  LL=[0.29, 0.29, 0.29, 0.297, 0.308, 0.319, 0.331, 0.343, 0.357, 0.375]
                  KL=[0.07, 0.07, 0.07, 0.066, 0.06, 0.053, 0.045, 0.039, 0.03, 0.019]
                  XF=[1, 1, 1, 1, 1, 1, 1, 1, 1, 1]
                SoilCrop PeanutSoil
                  LL=[0.29, 0.29, 0.29, 0.29, 0.3, 0.319, 0.339, 0.358, 0.383, 0.405]
                  KL=[0.06, 0.06, 0.06, 0.06, 0.055, 0.045, 0.035, 0.025, 0.012, 0.001]
                  XF=[1, 1, 1, 1, 1, 1, 1, 1, 1, 1]
                SoilCrop BarleySoil
                  LL=[0.29, 0.29, 0.291, 0.299, 0.311, 0.324, 0.338, 0.352, 0.369, 0.39]
                  KL=[0.07, 0.07, 0.07, 0.065, 0.058, 0.049, 0.041, 0.033, 0.023, 0.01]
                  XF=[1, 1, 1, 1, 1, 1, 1, 1, 1, 1]
                SoilCrop CottonSoil
                  LL=[0.29, 0.29, 0.29, 0.29, 0.29, 0.297, 0.31, 0.323, 0.339, 0.358]
                  KL=[0.1, 0.1, 0.1, 0.1, 0.1, 0.094, 0.083, 0.072, 0.058, 0.042]
                  XF=[1, 1, 1, 1, 1, 1, 1, 1, 1, 1]
                SoilCrop OatsSoil
                  LL=[0.29, 0.29, 0.291, 0.3, 0.314, 0.329, 0.345, 0.36, 0.38, 0.402]
                  KL=[0.06, 0.06, 0.06, 0.055, 0.048, 0.04, 0.032, 0.024, 0.014, 0.003]
                  XF=[1, 1, 1, 1, 1, 1, 1, 1, 1, 1]
                SoilCrop ChickpeaSoil
                  LL=[0.29, 0.29, 0.29, 0.29, 0.299, 0.317, 0.335, 0.353, 0.376, 0.401]
                  KL=[0.06, 0.06, 0.06, 0.06, 0.055, 0.046, 0.037, 0.028, 0.016, 0.003]
                  XF=[1, 1, 1, 1, 1, 1, 1, 1, 1, 1]
                SoilCrop MungbeanSoil
                  LL=[0.29, 0.29, 0.29, 0.294, 0.314, 0.337, 0.36, 0.384, 0.405, 0.407]
                  KL=[0.06, 0.06, 0.06, 0.058, 0.048, 0.036, 0.024, 0.012, 0.001, 0]
                  XF=[1, 1, 1, 1, 1, 1, 1, 1, 1, 0]
                SoilCrop Pigeon PeaSoil
                  LL=[0.29, 0.29, 0.29, 0.29, 0.3, 0.319, 0.339, 0.358, 0.383, 0.405]
                  KL=[0.06, 0.06, 0.06, 0.06, 0.055, 0.045, 0.035, 0.025, 0.012, 0.001]
                  XF=[1, 1, 1, 1, 1, 1, 1, 1, 1, 1]
                SoilCrop CowpeaSoil
                  LL=[0.29, 0.29, 0.291, 0.3, 0.314, 0.329, 0.345, 0.36, 0.38, 0.402]
                  KL=[0.06, 0.06, 0.06, 0.055, 0.048, 0.04, 0.032, 0.024, 0.014, 0.003]
                  XF=[1, 1, 1, 1, 1, 1, 1, 1, 1, 1]
                SoilCrop FababeanSoil
                  LL=[0.29, 0.29, 0.29, 0.29, 0.292, 0.307, 0.323, 0.34, 0.361, 0.386]
                  KL=[0.08, 0.08, 0.08, 0.08, 0.079, 0.069, 0.057, 0.046, 0.031, 0.014]
                  XF=[1, 1, 1, 1, 1, 1, 1, 1, 1, 1]
                SoilCrop LucerneSoil
                  LL=[0.29, 0.29, 0.29, 0.29, 0.29, 0.29, 0.29, 0.291, 0.303, 0.319]
                  KL=[0.1, 0.1, 0.1, 0.1, 0.1, 0.1, 0.1, 0.099, 0.089, 0.075]
                  XF=[1, 1, 1, 1, 1, 1, 1, 1, 1, 1]
                SoilCrop LupinSoil
                  LL=[0.29, 0.29, 0.291, 0.3, 0.314, 0.329, 0.345, 0.36, 0.38, 0.402]
                  KL=[0.06, 0.06, 0.06, 0.055, 0.048, 0.04, 0.032, 0.024, 0.014, 0.003]
                  XF=[1, 1, 1, 1, 1, 1, 1, 1, 1, 1]
                SoilCrop LentilSoil
                  LL=[0.29, 0.29, 0.291, 0.3, 0.314, 0.329, 0.345, 0.36, 0.38, 0.402]
                  KL=[0.06, 0.06, 0.06, 0.055, 0.048, 0.04, 0.032, 0.024, 0.014, 0.003]
                  XF=[1, 1, 1, 1, 1, 1, 1, 1, 1, 1]
                SoilCrop TriticaleSoil
                  LL=[0.29, 0.29, 0.298, 0.314, 0.333, 0.354, 0.375, 0.396, 0.407, 0.407]
                  KL=[0.07, 0.07, 0.065, 0.056, 0.045, 0.032, 0.019, 0.006, 0, 0]
                  XF=[1, 1, 1, 1, 1, 1, 1, 1, 0, 0]
                SoilCrop EucalyptusSoil
                  LL=[0.29, 0.29, 0.29, 0.291, 0.292, 0.293, 0.294, 0.295, 0.297, 0.299]
                  KL=[0.08, 0.08, 0.08, 0.079, 0.079, 0.078, 0.077, 0.076, 0.075, 0.074]
                  XF=[1, 1, 1, 1, 1, 1, 1, 1, 1, 1]
                SoilCrop GliricidiaSoil
                  LL=[0.29, 0.29, 0.29, 0.292, 0.294, 0.296, 0.299, 0.301, 0.304, 0.308]
                  KL=[0.08, 0.08, 0.08, 0.079, 0.077, 0.076, 0.074, 0.072, 0.07, 0.068]
                  XF=[1, 1, 1, 1, 1, 1, 1, 1, 1, 1]
                SoilCrop PotatoSoil
                  LL=[0.22, 0.23, 0.243, 0.255, 0.268, 0.28, 0.292, 0.304, 0.32, 0.337]
                  KL=[0.06, 0.06, 0.06, 0.055, 0.048, 0.04, 0.032, 0.024, 0.014, 0.003]
                  XF=[1, 1, 1, 1, 1, 1, 1, 1, 1, 1]
              WaterBalance SoilWater: SummerDate=1-nov; SummerU=6; SummerCona=6; WinterDate=1-apr; WinterU=2; WinterCona=2; DiffusConst=4328.89; DiffusSlope=1.67; Salb=0.12; CN2Bare=73; CNRed=20; CNCov=0; DischargeWidth=5; CatchmentArea=10; Thickness=[150, 150, 150, 150, 200, 200, 200, 200, 300, 300]
                SWCON=[0.157, 0.134, 0.121, 0.105, 0.077, 0.08, 0.083, 0.084, 0.06, 0.062]
              Organic: FOMCNRatio=40
                Thickness  Carbon  SoilCNRatio  FBiom  FInert  FOM
                150        2.691   13.1         0.04   0.39    60.644
                150        1.748   13.1         0.031  0.585   48.4252
                150        1.35    13.1         0.014  0.751   38.6683
                150        1.156   13.1         0.01   0.873   30.8773
                200        0.985   13.1         0.01   0.99    22.8745
                200        0.838   13.1         0.01   0.99    16.9458
                200        0.757   13.1         0.01   0.99    12.5538
                200        0.742   13.1         0.01   0.99    9.30006
                300        0.724   13.1         0.01   0.99    5.92998
                300        0.702   13.1         0.01   0.99    3.78112
              Chemical
                Thickness  NO3N  NH4N  PH
                150        0     0     6.55
                150        0     0     6.65
                150        0     0     6.7
                150        0     0     6.7
                200        0     0     6.73
                200        0     0     6.78
                200        0     0     6.81
                200        0     0     6.83
                300        0     0     6.86
                300        0     0     6.88
              Nutrient
              CERESSoilTemperature Temperature
          CompositeFactor S1025_34875 1351mm
            Specifications:
              [Soil]
              [Weather]
            Weather -1025_34875: FileName=%root%\Examples\WeatherFiles\-1025_34875.met
            Soil Synthetic Soil Derived from ISRIC SoilGrids: ASCOrder=NA; ASCSubOrder=NA; SoilType=Haplic Acrisols; Site=NA; NearestTown=NA; Region=NA; State=NA; Country=Kenya; NaturalVegetation=NA; ApsoilNumber=9999; Latitude=-1.125; Longitude=34.875; LocationAccuracy=+- 250 m; DataSource=ISRIC SoilGrids
              Sample Initial nitrogen: Thickness=[150, 150, 150, 150, 200, 200, 200, 200, 300, 300]; SWUnits=Volumetric; OCUnits=Total; PHUnits=Water
              InitialWater Initial water: PercentMethod=0; FractionFull=0
              Physical
                Thickness  ParticleSizeClay  ParticleSizeSand  ParticleSizeSilt  BD     AirDry  LL15   DUL    SAT    KS
                150        40.7              33.7              25.7              1.149  0.087   0.26   0.392  0.52   3.14
                150        42.5              32.5              25                1.192  0.087   0.26   0.387  0.505  2.538
                150        43.8              31.5              24.5              1.216  0.087   0.263  0.386  0.5    2.196
                150        45.2              30.5              23.5              1.226  0.089   0.268  0.387  0.5    1.845
                200        46.5              30                23                1.237  0.09    0.27   0.387  0.497  1.596
                200        47.5              30                23                1.248  0.09    0.27   0.387  0.492  1.421
                200        47.9              30.1              23                1.254  0.09    0.269  0.386  0.49   1.357
                200        47.7              30.3              23                1.256  0.089   0.267  0.384  0.49   1.389
                300        47.5              30.6              23                1.258  0.088   0.265  0.381  0.49   1.429
                300        47.2              30.9              23                1.261  0.087   0.262  0.378  0.49   1.48
                SoilCrop RiceSoil
                  LL=[0.26, 0.26, 0.263, 0.277, 0.293, 0.309, 0.324, 0.337, 0.354, 0.373]
                  KL=[0.06, 0.06, 0.06, 0.055, 0.048, 0.04, 0.032, 0.024, 0.014, 0.003]
                  XF=[1, 1, 1, 1, 1, 1, 1, 1, 1, 1]
                SoilCrop WheatSoil
                  LL=[0.26, 0.26, 0.263, 0.277, 0.293, 0.309, 0.324, 0.337, 0.354, 0.373]
                  KL=[0.06, 0.06, 0.06, 0.055, 0.048, 0.04, 0.032, 0.024, 0.014, 0.003]
                  XF=[1, 1, 1, 1, 1, 1, 1, 1, 1, 1]
                SoilCrop TeffSoil
                  LL=[0.26, 0.26, 0.263, 0.277, 0.293, 0.309, 0.324, 0.337, 0.354, 0.373]
                  KL=[0.06, 0.06, 0.06, 0.055, 0.048, 0.04, 0.032, 0.024, 0.014, 0.003]
                  XF=[1, 1, 1, 1, 1, 1, 1, 1, 1, 1]
                SoilCrop SugarcaneSoil
                  LL=[0.26, 0.26, 0.263, 0.273, 0.284, 0.293, 0.301, 0.307, 0.316, 0.327]
                  KL=[0.06, 0.06, 0.06, 0.057, 0.053, 0.048, 0.044, 0.039, 0.033, 0.027]
                  XF=[1, 1, 1, 1, 1, 1, 1, 1, 1, 1]
                SoilCrop MaizeSoil
                  LL=[0.26, 0.26, 0.263, 0.277, 0.293, 0.309, 0.324, 0.337, 0.354, 0.373]
                  KL=[0.06, 0.06, 0.06, 0.055, 0.048, 0.04, 0.032, 0.024, 0.014, 0.003]
                  XF=[1, 1, 1, 1, 1, 1, 1, 1, 1, 1]
                SoilCrop SoybeanSoil
                  LL=[0.26, 0.26, 0.263, 0.277, 0.293, 0.309, 0.324, 0.337, 0.354, 0.373]
                  KL=[0.06, 0.06, 0.06, 0.055, 0.048, 0.04, 0.032, 0.024, 0.014, 0.003]
                  XF=[1, 1, 1, 1, 1, 1, 1, 1, 1, 1]
                SoilCrop OilPalmSoil
                  LL=[0.26, 0.26, 0.263, 0.273, 0.284, 0.293, 0.301, 0.307, 0.316, 0.327]
                  KL=[0.06, 0.06, 0.06, 0.057, 0.053, 0.048, 0.044, 0.039, 0.033, 0.027]
                  XF=[1, 1, 1, 1, 1, 1, 1, 1, 1, 1]
                SoilCrop CassavaSoil
                  LL=[0.26, 0.26, 0.263, 0.277, 0.293, 0.309, 0.324, 0.337, 0.354, 0.373]
                  KL=[0.06, 0.06, 0.06, 0.055, 0.048, 0.04, 0.032, 0.024, 0.014, 0.003]
                  XF=[1, 1, 1, 1, 1, 1, 1, 1, 1, 1]
                SoilCrop PlantainForageSoil
                  LL=[0.26, 0.26, 0.263, 0.273, 0.284, 0.293, 0.301, 0.307, 0.316, 0.327]
                  KL=[0.06, 0.06, 0.06, 0.057, 0.053, 0.048, 0.044, 0.039, 0.033, 0.027]
                  XF=[1, 1, 1, 1, 1, 1, 1, 1, 1, 1]
                SoilCrop SunflowerSoil
                  LL=[0.261, 0.269, 0.283, 0.297, 0.311, 0.325, 0.338, 0.35, 0.364, 0.377]
                  KL=[0.1, 0.093, 0.084, 0.075, 0.065, 0.053, 0.041, 0.029, 0.015, 0.001]
                  XF=[1, 1, 1, 1, 1, 1, 1, 1, 1, 1]
                SoilCrop CanolaSoil
                  LL=[0.26, 0.26, 0.263, 0.277, 0.293, 0.309, 0.324, 0.337, 0.354, 0.373]
                  KL=[0.06, 0.06, 0.06, 0.055, 0.048, 0.04, 0.032, 0.024, 0.014, 0.003]
                  XF=[1, 1, 1, 1, 1, 1, 1, 1, 1, 1]
                SoilCrop SorghumSoil
                  LL=[0.26, 0.26, 0.263, 0.275, 0.288, 0.299, 0.31, 0.32, 0.332, 0.346]
                  KL=[0.07, 0.07, 0.07, 0.066, 0.06, 0.053, 0.045, 0.039, 0.03, 0.019]
                  XF=[1, 1, 1, 1, 1, 1, 1, 1, 1, 1]
                SoilCrop MilletSoil
                  LL=[0.26, 0.26, 0.263, 0.275, 0.288, 0.299, 0.31, 0.32, 0.332, 0.346]
                  KL=[0.07, 0.07, 0.07, 0.066, 0.06, 0.053, 0.045, 0.039, 0.03, 0.019]
                  XF=[1, 1, 1, 1, 1, 1, 1, 1, 1, 1]
                SoilCrop PeanutSoil
                  LL=[0.26, 0.26, 0.263, 0.268, 0.28, 0.299, 0.318, 0.335, 0.357, 0.376]
                  KL=[0.06, 0.06, 0.06, 0.06, 0.055, 0.045, 0.035, 0.025, 0.012, 0.001]
                  XF=[1, 1, 1, 1, 1, 1, 1, 1, 1, 1]
                SoilCrop BarleySoil
                  LL=[0.26, 0.26, 0.263, 0.276, 0.291, 0.304, 0.317, 0.329, 0.343, 0.361]
                  KL=[0.07, 0.07, 0.07, 0.065, 0.058, 0.049, 0.041, 0.033, 0.023, 0.01]
                  XF=[1, 1, 1, 1, 1, 1, 1, 1, 1, 1]
                SoilCrop CottonSoil
                  LL=[0.26, 0.26, 0.263, 0.268, 0.27, 0.277, 0.289, 0.299, 0.313, 0.33]
                  KL=[0.1, 0.1, 0.1, 0.1, 0.1, 0.094, 0.083, 0.072, 0.058, 0.042]
                  XF=[1, 1, 1, 1, 1, 1, 1, 1, 1, 1]
                SoilCrop OatsSoil
                  LL=[0.26, 0.26, 0.263, 0.277, 0.293, 0.309, 0.324, 0.337, 0.354, 0.373]
                  KL=[0.06, 0.06, 0.06, 0.055, 0.048, 0.04, 0.032, 0.024, 0.014, 0.003]
                  XF=[1, 1, 1, 1, 1, 1, 1, 1, 1, 1]
                SoilCrop ChickpeaSoil
                  LL=[0.26, 0.26, 0.263, 0.268, 0.279, 0.297, 0.314, 0.33, 0.35, 0.372]
                  KL=[0.06, 0.06, 0.06, 0.06, 0.055, 0.046, 0.037, 0.028, 0.016, 0.003]
                  XF=[1, 1, 1, 1, 1, 1, 1, 1, 1, 1]
                SoilCrop MungbeanSoil
                  LL=[0.26, 0.26, 0.263, 0.271, 0.293, 0.317, 0.339, 0.361, 0.379, 0.378]
                  KL=[0.06, 0.06, 0.06, 0.058, 0.048, 0.036, 0.024, 0.012, 0.001, 0]
                  XF=[1, 1, 1, 1, 1, 1, 1, 1, 1, 0]
                SoilCrop Pigeon PeaSoil
                  LL=[0.26, 0.26, 0.263, 0.268, 0.28, 0.299, 0.318, 0.335, 0.357, 0.376]
                  KL=[0.06, 0.06, 0.06, 0.06, 0.055, 0.045, 0.035, 0.025, 0.012, 0.001]
                  XF=[1, 1, 1, 1, 1, 1, 1, 1, 1, 1]
                SoilCrop CowpeaSoil
                  LL=[0.26, 0.26, 0.263, 0.277, 0.293, 0.309, 0.324, 0.337, 0.354, 0.373]
                  KL=[0.06, 0.06, 0.06, 0.055, 0.048, 0.04, 0.032, 0.024, 0.014, 0.003]
                  XF=[1, 1, 1, 1, 1, 1, 1, 1, 1, 1]
                SoilCrop FababeanSoil
                  LL=[0.26, 0.26, 0.263, 0.268, 0.272, 0.287, 0.302, 0.317, 0.335, 0.357]
                  KL=[0.08, 0.08, 0.08, 0.08, 0.079, 0.069, 0.057, 0.046, 0.031, 0.014]
                  XF=[1, 1, 1, 1, 1, 1, 1, 1, 1, 1]
                SoilCrop LucerneSoil
                  LL=[0.26, 0.26, 0.263, 0.268, 0.27, 0.27, 0.269, 0.268, 0.278, 0.291]
                  KL=[0.1, 0.1, 0.1, 0.1, 0.1, 0.1, 0.1, 0.099, 0.089, 0.075]
                  XF=[1, 1, 1, 1, 1, 1, 1, 1, 1, 1]
                SoilCrop LupinSoil
                  LL=[0.26, 0.26, 0.263, 0.277, 0.293, 0.309, 0.324, 0.337, 0.354, 0.373]
                  KL=[0.06, 0.06, 0.06, 0.055, 0.048, 0.04, 0.032, 0.024, 0.014, 0.003]
                  XF=[1, 1, 1, 1, 1, 1, 1, 1, 1, 1]
                SoilCrop LentilSoil
                  LL=[0.26, 0.26, 0.263, 0.277, 0.293, 0.309, 0.324, 0.337, 0.354, 0.373]
                  KL=[0.06, 0.06, 0.06, 0.055, 0.048, 0.04, 0.032, 0.024, 0.014, 0.003]
                  XF=[1, 1, 1, 1, 1, 1, 1, 1, 1, 1]
                SoilCrop TriticaleSoil
                  LL=[0.26, 0.26, 0.271, 0.292, 0.313, 0.334, 0.354, 0.373, 0.381, 0.378]
                  KL=[0.07, 0.07, 0.065, 0.056, 0.045, 0.032, 0.019, 0.006, 0, 0]
                  XF=[1, 1, 1, 1, 1, 1, 1, 1, 0, 0]
                SoilCrop EucalyptusSoil
                  LL=[0.26, 0.26, 0.263, 0.268, 0.272, 0.273, 0.273, 0.272, 0.271, 0.27]
                  KL=[0.08, 0.08, 0.08, 0.079, 0.079, 0.078, 0.077, 0.076, 0.075, 0.074]
                  XF=[1, 1, 1, 1, 1, 1, 1, 1, 1, 1]
                SoilCrop GliricidiaSoil
                  LL=[0.26, 0.26, 0.263, 0.269, 0.274, 0.276, 0.278, 0.278, 0.278, 0.279]
                  KL=[0.08, 0.08, 0.08, 0.079, 0.077, 0.076, 0.074, 0.072, 0.07, 0.068]
                  XF=[1, 1, 1, 1, 1, 1, 1, 1, 1, 1]
                SoilCrop PotatoSoil
                  LL=[0.22, 0.23, 0.243, 0.255, 0.268, 0.28, 0.292, 0.304, 0.32, 0.337]
                  KL=[0.06, 0.06, 0.06, 0.055, 0.048, 0.04, 0.032, 0.024, 0.014, 0.003]
                  XF=[1, 1, 1, 1, 1, 1, 1, 1, 1, 1]
                SoilCrop PotatoSoil1
                  LL=[0.22, 0.23, 0.243, 0.255, 0.268, 0.28, 0.292, 0.304, 0.32, 0.337]
                  KL=[0.06, 0.06, 0.06, 0.055, 0.048, 0.04, 0.032, 0.024, 0.014, 0.003]
                  XF=[1, 1, 1, 1, 1, 1, 1, 1, 1, 1]
              WaterBalance SoilWater: SummerDate=1-nov; SummerU=6; SummerCona=6; WinterDate=1-apr; WinterU=4; WinterCona=2.5; DiffusConst=5496.84; DiffusSlope=-0.63; Salb=0.12; CN2Bare=73; CNRed=20; CNCov=0; DischargeWidth=5; CatchmentArea=10; Thickness=[150, 150, 150, 150, 200, 200, 200, 200, 300, 300]
                SWCON=[0.133, 0.12, 0.11, 0.096, 0.067, 0.063, 0.061, 0.061, 0.042, 0.042]
              Organic: FOMCNRatio=40
                Thickness  Carbon  SoilCNRatio  FBiom  FInert  FOM
                150        2.969   10.1         0.04   0.376   84.9016
                150        1.964   10.1         0.031  0.548   67.7953
                150        1.462   10.1         0.014  0.722   54.1356
                150        1.217   10.1         0.01   0.859   43.2282
                200        1.012   10.1         0.01   0.99    32.0242
                200        0.848   10.1         0.01   0.99    23.7241
                200        0.757   10.1         0.01   0.99    17.5753
                200        0.738   10.1         0.01   0.99    13.0201
                300        0.715   10.1         0.01   0.99    8.30197
                300        0.687   10.1         0.01   0.99    5.29357
              Chemical
                Thickness  NO3N  NH4N  PH
                150        0     0     5.62
                150        0     0     5.6
                150        0     0     5.6
                150        0     0     5.6
                200        0     0     5.6
                200        0     0     5.6
                200        0     0     5.6
                200        0     0     5.6
                300        0     0     5.6
                300        0     0     5.6
              Nutrient
              CERESSoilTemperature Temperature
          CompositeFactor 75_34825 1973 mm
            Specifications:
              [Soil]
              [Weather]
            Weather 75_34825: FileName=%root%\Examples\WeatherFiles\75_34825.met
            Soil Synthetic Soil Derived from ISRIC SoilGrids: ASCOrder=NA; ASCSubOrder=NA; SoilType=Haplic Acrisols; Site=NA; NearestTown=NA; Region=NA; State=NA; Country=Kenya; NaturalVegetation=NA; ApsoilNumber=9999; Latitude=0.125; Longitude=34.875; LocationAccuracy=+- 250 m; DataSource=ISRIC SoilGrids
              Sample Initial nitrogen: Thickness=[150, 150, 150, 150, 200, 200, 200, 200, 300, 300]; SWUnits=Volumetric; OCUnits=Total; PHUnits=Water
              InitialWater Initial water: PercentMethod=0; FractionFull=0
              Physical
                Thickness  ParticleSizeClay  ParticleSizeSand  ParticleSizeSilt  BD     AirDry  LL15   DUL    SAT    KS
                150        43.2              32.2              24.7              1.081  0.091   0.272  0.407  0.54   2.349
                150        45                31.5              23.5              1.186  0.09    0.27   0.391  0.51   1.899
                150        47.5              30.5              22.3              1.216  0.09    0.27   0.384  0.5    1.421
                150        50.5              29.5              20.8              1.227  0.09    0.27   0.38   0.5    1.003
                200        52.2              28.7              19.8              1.238  0.09    0.27   0.376  0.5    0.819
                200        52.8              28.3              19.2              1.249  0.09    0.27   0.373  0.5    0.773
                200        52.9              28.1              19                1.256  0.09    0.27   0.371  0.499  0.76
                200        52.7              28.3              19                1.258  0.09    0.27   0.371  0.497  0.777
                300        52.5              28.6              19                1.261  0.09    0.27   0.37   0.494  0.8
                300        52.1              28.8              19                1.264  0.09    0.27   0.37   0.491  0.829
                SoilCrop RiceSoil
                  LL=[0.272, 0.27, 0.271, 0.279, 0.291, 0.304, 0.317, 0.33, 0.347, 0.366]
                  KL=[0.06, 0.06, 0.06, 0.055, 0.048, 0.04, 0.032, 0.024, 0.014, 0.003]
                  XF=[1, 1, 1, 1, 1, 1, 1, 1, 1, 1]
                SoilCrop WheatSoil
                  LL=[0.272, 0.27, 0.271, 0.279, 0.291, 0.304, 0.317, 0.33, 0.347, 0.366]
                  KL=[0.06, 0.06, 0.06, 0.055, 0.048, 0.04, 0.032, 0.024, 0.014, 0.003]
                  XF=[1, 1, 1, 1, 1, 1, 1, 1, 1, 1]
                SoilCrop TeffSoil
                  LL=[0.272, 0.27, 0.271, 0.279, 0.291, 0.304, 0.317, 0.33, 0.347, 0.366]
                  KL=[0.06, 0.06, 0.06, 0.055, 0.048, 0.04, 0.032, 0.024, 0.014, 0.003]
                  XF=[1, 1, 1, 1, 1, 1, 1, 1, 1, 1]
                SoilCrop SugarcaneSoil
                  LL=[0.272, 0.27, 0.27, 0.275, 0.282, 0.29, 0.297, 0.305, 0.314, 0.326]
                  KL=[0.06, 0.06, 0.06, 0.057, 0.053, 0.048, 0.044, 0.039, 0.033, 0.027]
                  XF=[1, 1, 1, 1, 1, 1, 1, 1, 1, 1]
                SoilCrop MaizeSoil
                  LL=[0.272, 0.27, 0.271, 0.279, 0.291, 0.304, 0.317, 0.33, 0.347, 0.366]
                  KL=[0.06, 0.06, 0.06, 0.055, 0.048, 0.04, 0.032, 0.024, 0.014, 0.003]
                  XF=[1, 1, 1, 1, 1, 1, 1, 1, 1, 1]
                SoilCrop SoybeanSoil
                  LL=[0.272, 0.27, 0.271, 0.279, 0.291, 0.304, 0.317, 0.33, 0.347, 0.366]
                  KL=[0.06, 0.06, 0.06, 0.055, 0.048, 0.04, 0.032, 0.024, 0.014, 0.003]
                  XF=[1, 1, 1, 1, 1, 1, 1, 1, 1, 1]
                SoilCrop OilPalmSoil
                  LL=[0.272, 0.27, 0.27, 0.275, 0.282, 0.29, 0.297, 0.305, 0.314, 0.326]
                  KL=[0.06, 0.06, 0.06, 0.057, 0.053, 0.048, 0.044, 0.039, 0.033, 0.027]
                  XF=[1, 1, 1, 1, 1, 1, 1, 1, 1, 1]
                SoilCrop CassavaSoil
                  LL=[0.272, 0.27, 0.271, 0.279, 0.291, 0.304, 0.317, 0.33, 0.347, 0.366]
                  KL=[0.06, 0.06, 0.06, 0.055, 0.048, 0.04, 0.032, 0.024, 0.014, 0.003]
                  XF=[1, 1, 1, 1, 1, 1, 1, 1, 1, 1]
                SoilCrop PlantainForageSoil
                  LL=[0.272, 0.27, 0.27, 0.275, 0.282, 0.29, 0.297, 0.305, 0.314, 0.326]
                  KL=[0.06, 0.06, 0.06, 0.057, 0.053, 0.048, 0.044, 0.039, 0.033, 0.027]
                  XF=[1, 1, 1, 1, 1, 1, 1, 1, 1, 1]
                SoilCrop SunflowerSoil
                  LL=[0.272, 0.279, 0.288, 0.297, 0.307, 0.318, 0.329, 0.341, 0.356, 0.369]
                  KL=[0.1, 0.093, 0.084, 0.075, 0.065, 0.053, 0.041, 0.029, 0.015, 0.001]
                  XF=[1, 1, 1, 1, 1, 1, 1, 1, 1, 1]
                SoilCrop CanolaSoil
                  LL=[0.272, 0.27, 0.271, 0.279, 0.291, 0.304, 0.317, 0.33, 0.347, 0.366]
                  KL=[0.06, 0.06, 0.06, 0.055, 0.048, 0.04, 0.032, 0.024, 0.014, 0.003]
                  XF=[1, 1, 1, 1, 1, 1, 1, 1, 1, 1]
                SoilCrop SorghumSoil
                  LL=[0.272, 0.27, 0.27, 0.277, 0.286, 0.296, 0.305, 0.315, 0.328, 0.343]
                  KL=[0.07, 0.07, 0.07, 0.066, 0.06, 0.053, 0.045, 0.039, 0.03, 0.019]
                  XF=[1, 1, 1, 1, 1, 1, 1, 1, 1, 1]
                SoilCrop MilletSoil
                  LL=[0.272, 0.27, 0.27, 0.277, 0.286, 0.296, 0.305, 0.315, 0.328, 0.343]
                  KL=[0.07, 0.07, 0.07, 0.066, 0.06, 0.053, 0.045, 0.039, 0.03, 0.019]
                  XF=[1, 1, 1, 1, 1, 1, 1, 1, 1, 1]
                SoilCrop PeanutSoil
                  LL=[0.272, 0.27, 0.27, 0.27, 0.279, 0.296, 0.312, 0.329, 0.35, 0.369]
                  KL=[0.06, 0.06, 0.06, 0.06, 0.055, 0.045, 0.035, 0.025, 0.012, 0.001]
                  XF=[1, 1, 1, 1, 1, 1, 1, 1, 1, 1]
                SoilCrop BarleySoil
                  LL=[0.272, 0.27, 0.271, 0.278, 0.289, 0.3, 0.312, 0.323, 0.338, 0.355]
                  KL=[0.07, 0.07, 0.07, 0.065, 0.058, 0.049, 0.041, 0.033, 0.023, 0.01]
                  XF=[1, 1, 1, 1, 1, 1, 1, 1, 1, 1]
                SoilCrop CottonSoil
                  LL=[0.272, 0.27, 0.27, 0.27, 0.27, 0.276, 0.287, 0.298, 0.312, 0.328]
                  KL=[0.1, 0.1, 0.1, 0.1, 0.1, 0.094, 0.083, 0.072, 0.058, 0.042]
                  XF=[1, 1, 1, 1, 1, 1, 1, 1, 1, 1]
                SoilCrop OatsSoil
                  LL=[0.272, 0.27, 0.271, 0.279, 0.291, 0.304, 0.317, 0.33, 0.347, 0.366]
                  KL=[0.06, 0.06, 0.06, 0.055, 0.048, 0.04, 0.032, 0.024, 0.014, 0.003]
                  XF=[1, 1, 1, 1, 1, 1, 1, 1, 1, 1]
                SoilCrop ChickpeaSoil
                  LL=[0.272, 0.27, 0.27, 0.27, 0.278, 0.294, 0.309, 0.324, 0.343, 0.365]
                  KL=[0.06, 0.06, 0.06, 0.06, 0.055, 0.046, 0.037, 0.028, 0.016, 0.003]
                  XF=[1, 1, 1, 1, 1, 1, 1, 1, 1, 1]
                SoilCrop MungbeanSoil
                  LL=[0.272, 0.27, 0.27, 0.274, 0.291, 0.311, 0.33, 0.351, 0.369, 0.37]
                  KL=[0.06, 0.06, 0.06, 0.058, 0.048, 0.036, 0.024, 0.012, 0.001, 0]
                  XF=[1, 1, 1, 1, 1, 1, 1, 1, 1, 0]
                SoilCrop Pigeon PeaSoil
                  LL=[0.272, 0.27, 0.27, 0.27, 0.279, 0.296, 0.312, 0.329, 0.35, 0.369]
                  KL=[0.06, 0.06, 0.06, 0.06, 0.055, 0.045, 0.035, 0.025, 0.012, 0.001]
                  XF=[1, 1, 1, 1, 1, 1, 1, 1, 1, 1]
                SoilCrop CowpeaSoil
                  LL=[0.272, 0.27, 0.271, 0.279, 0.291, 0.304, 0.317, 0.33, 0.347, 0.366]
                  KL=[0.06, 0.06, 0.06, 0.055, 0.048, 0.04, 0.032, 0.024, 0.014, 0.003]
                  XF=[1, 1, 1, 1, 1, 1, 1, 1, 1, 1]
                SoilCrop FababeanSoil
                  LL=[0.272, 0.27, 0.27, 0.27, 0.272, 0.285, 0.299, 0.313, 0.331, 0.352]
                  KL=[0.08, 0.08, 0.08, 0.08, 0.079, 0.069, 0.057, 0.046, 0.031, 0.014]
                  XF=[1, 1, 1, 1, 1, 1, 1, 1, 1, 1]
                SoilCrop LucerneSoil
                  LL=[0.272, 0.27, 0.27, 0.27, 0.27, 0.27, 0.27, 0.271, 0.281, 0.295]
                  KL=[0.1, 0.1, 0.1, 0.1, 0.1, 0.1, 0.1, 0.099, 0.089, 0.075]
                  XF=[1, 1, 1, 1, 1, 1, 1, 1, 1, 1]
                SoilCrop LupinSoil
                  LL=[0.272, 0.27, 0.271, 0.279, 0.291, 0.304, 0.317, 0.33, 0.347, 0.366]
                  KL=[0.06, 0.06, 0.06, 0.055, 0.048, 0.04, 0.032, 0.024, 0.014, 0.003]
                  XF=[1, 1, 1, 1, 1, 1, 1, 1, 1, 1]
                SoilCrop LentilSoil
                  LL=[0.272, 0.27, 0.271, 0.279, 0.291, 0.304, 0.317, 0.33, 0.347, 0.366]
                  KL=[0.06, 0.06, 0.06, 0.055, 0.048, 0.04, 0.032, 0.024, 0.014, 0.003]
                  XF=[1, 1, 1, 1, 1, 1, 1, 1, 1, 1]
                SoilCrop TriticaleSoil
                  LL=[0.272, 0.27, 0.278, 0.292, 0.309, 0.326, 0.343, 0.362, 0.37, 0.37]
                  KL=[0.07, 0.07, 0.065, 0.056, 0.045, 0.032, 0.019, 0.006, 0, 0]
                  XF=[1, 1, 1, 1, 1, 1, 1, 1, 0, 0]
                SoilCrop EucalyptusSoil
                  LL=[0.272, 0.27, 0.27, 0.271, 0.272, 0.273, 0.274, 0.275, 0.276, 0.277]
                  KL=[0.08, 0.08, 0.08, 0.079, 0.079, 0.078, 0.077, 0.076, 0.075, 0.074]
                  XF=[1, 1, 1, 1, 1, 1, 1, 1, 1, 1]
                SoilCrop GliricidiaSoil
                  LL=[0.272, 0.27, 0.27, 0.271, 0.273, 0.275, 0.277, 0.279, 0.282, 0.285]
                  KL=[0.08, 0.08, 0.08, 0.079, 0.077, 0.076, 0.074, 0.072, 0.07, 0.068]
                  XF=[1, 1, 1, 1, 1, 1, 1, 1, 1, 1]
                SoilCrop PotatoSoil
                  LL=[0.22, 0.23, 0.243, 0.255, 0.268, 0.28, 0.292, 0.304, 0.32, 0.337]
                  KL=[0.06, 0.06, 0.06, 0.055, 0.048, 0.04, 0.032, 0.024, 0.014, 0.003]
                  XF=[1, 1, 1, 1, 1, 1, 1, 1, 1, 1]
              WaterBalance SoilWater: SummerDate=1-may; SummerU=6; SummerCona=6; WinterDate=1-oct; WinterU=4; WinterCona=2.5; DiffusConst=10011.31; DiffusSlope=-5.23; Salb=0.12; CN2Bare=73; CNRed=20; CNCov=0; DischargeWidth=5; CatchmentArea=10; Thickness=[150, 150, 150, 150, 200, 200, 200, 200, 300, 300]
                SWCON=[0.102, 0.094, 0.075, 0.053, 0.032, 0.03, 0.029, 0.03, 0.021, 0.022]
              Organic: FOMCNRatio=40
                Thickness  Carbon  SoilCNRatio  FBiom  FInert  FOM
                150        3.816   11.6         0.04   0.364   84.9016
                150        2.277   11.6         0.031  0.556   67.7953
                150        1.768   11.6         0.014  0.698   54.1356
                150        1.443   11.6         0.01   0.848   43.2282
                200        1.212   11.6         0.01   0.99    32.0242
                200        1.073   11.6         0.01   0.99    23.7241
                200        0.998   11.6         0.01   0.99    17.5753
                200        0.987   11.6         0.01   0.99    13.0201
                300        0.973   11.6         0.01   0.99    8.30197
                300        0.956   11.6         0.01   0.99    5.29357
              Chemical
                Thickness  NO3N  NH4N  PH
                150        0     0     5.4
                150        0     0     5.4
                150        0     0     5.4
                150        0     0     5.4
                200        0     0     5.4
                200        0     0     5.4
                200        0     0     5.41
                200        0     0     5.43
                300        0     0     5.46
                300        0     0     5.49
              Nutrient
              CERESSoilTemperature Temperature
    Simulation Mar
      Clock: Start=2004-01-01; End=2009-04-30
      Summary SummaryFile
      Weather: FileName=%root%\Examples\WeatherFiles\-225_36025.met
      SoilArbitrator Soil Arbitrator
      Zone Field: Area=1; Slope=0; AspectAngle=0; Altitude=50
        Soil Synthetic Soil Derived from ISRIC SoilGrids: same as Mar.Factors.Permutation.Cell.S1375_37985 768mm.Synthetic Soil Derived from ISRIC SoilGrids
        Fertiliser
        SurfaceOrganicMatter: InitialResidueName=wheat_stubble; InitialResidueType=wheat; InitialResidueMass=500; InitialStandingFraction=0; InitialCPR=0; InitialCNR=100
        MicroClimate: a_interception=0; b_interception=1; c_interception=0; d_interception=0; soil_albedo=0.3; SoilHeatFluxFraction=0.4; MinimumHeightDiffForNewLayer=0; NightInterceptionFraction=0.5; ReferenceHeight=2
        RotationManager: InitialState=initial; Verbose=true
          Nodes:
            Name           OutlineColour
            summer fallow  Black
            Wheat          Black
            Maize          Black
            initial        Black
          Arcs:
            {Conditions=[[WheatManager].Script.CanHarvest], Actions=[[WheatManager].Script.HarvestCrop("glable");], SourceName=Wheat, DestinationName=summer fallow, Name=Arc 1}
            {Conditions=[[MaizeManager].Script.CanSow], Actions=[[MaizeManager].Script.SowCrop()], SourceName=summer fallow, DestinationName=Maize, Name=Arc 2}
            {Conditions=[[MaizeManager].Script.CanHarvest], Actions=[[MaizeManager].Script.HarvestCrop()], SourceName=Maize, DestinationName=initial, Name=Arc 3}
            {Conditions=[[WheatManager].Script.CanSow], Actions=[[WheatManager].Script.SowCrop()], SourceName=initial, DestinationName=Wheat, Name=Arc 4}
        Plant Maize
        Manager MaizeManager
          Crop = [Maize]
          Verbose = True
          StartDate = 10-apr
          EndDate = 10-jun
          MinESW = 50
          MinRain = 10
          RainDays = 14
          MustSow = True
          CultivarName = Katumani
          SowingDepth = 30
          RowSpacing = 500
          Population = 4
          accumulatedRain =
```csharp
using Models.Interfaces;
using APSIM.Shared.Utilities;
using Models.Utilities;
using Models.Soils;
using Models.PMF;
using Models.Core;
using System;
using System.Linq;
using Models.Climate;

namespace Models
{
    [Serializable]
    public class Script : Model
    {
        [Link] private Clock Clock;
        [Link] private Summary Summary;
        [Link] private Soil Soil;
        [Link]
        private ISoilWater waterBalance;
        //[Link] Simulation Simulation;

        [Separator("Script Configuration")]
        [Description("Crop to manage")]
        public IPlant Crop { get; set; }

        [Description("Run script in verbose mode?")]
        [Tooltip("If enabled, the script will print a large number of diagnostics to the summary file, to aid debugging")]
        public bool Verbose { get; set; }

        [Separator("Sowing Conditions")]
        [Description("Start of sowing window (d-mmm)")]
        public string StartDate { get; set; }
        [Description("End of sowing window (d-mmm)")]
        public string EndDate { get; set; }
        [Description("Minimum extractable soil water for sowing (mm)")]
        public double MinESW { get; set; }
        [Description("Accumulated rainfall required for sowing (mm)")]
        public double MinRain { get; set; }
        [Description("Duration of rainfall accumulation (d)")]
        public int RainDays { get; set; }
        [Tooltip("If enabled, and if sowing conditions are not met, the crop will be sown on the final day of the sowing window.")]
        [Description("Must sow (yes/no)")]
        public bool MustSow { get; set; }

        [Separator("Sowing Properties")]
        [Description("Cultivar to be sown")]
        [Display(Type = DisplayType.CultivarName)]
        public string CultivarName { get; set; }
        [Description("Sowing depth (mm)")]
        public double SowingDepth { get; set; }
        [Description("Row spacing (mm)")]
        public double RowSpacing { get; set; }
        [Description("Plant population (/m2)")]
        public double Population { get; set; }

        public Accumulator accumulatedRain { get; private set; }
        private bool afterInit = false;
                
        [EventSubscribe("StartOfSimulation")]
        private void OnSimulationCommencing(object sender, EventArgs e)
        {
            if (Crop == null)
                throw new Exception("Crop must not be null in rotations");
            accumulatedRain = new Accumulator(this, "[Weather].Rain", RainDays);
            Summary.WriteMessage(this, this.FullPath + " - Commence, crop=" + (Crop as Model).Name);
            afterInit = true;
        }
        
        [EventSubscribe("DoManagement")]
        private void DoManagement(object sender, EventArgs e)
        {
            accumulatedRain.Update();
        }

        // Test whether we can sow a crop today
        // +ve number - yes
        // 0          - no
        // -ve number - no, out of scope (planting window)
        [Units("0-1")]
        public int CanSow
        {
            get
            {
                if (!afterInit)
                    return 0;
                bool isPossibleToday = false;
                bool inWindow = DateUtilities.WithinDates(StartDate, Clock.Today, EndDate);
                bool endOfWindow = DateUtilities.DatesEqual(EndDate, Clock.Today);
                if (!Crop.IsAlive && inWindow && accumulatedRain.Sum > MinRain && MathUtilities.Sum(waterBalance.ESW) > MinESW)
                    isPossibleToday = true;

                if (isPossibleToday)
                    return 1;
         
                if (!Crop.IsAlive && endOfWindow && MustSow)
                    return 1;

                if (!Crop.IsAlive && !inWindow)
                    return -1;
                return 0;
            }
        }

        public void SowCrop()
        {
            Summary.WriteMessage(this, this.FullPath + " -  sowing " + (Crop as Model).Name);
            Crop.Sow(population: Population, cultivar: CultivarName, depth: SowingDepth, rowSpacing: RowSpacing);    
        }

        [Units("0-1")] 
        public int CanHarvest
        {
            get
            {
                if (!afterInit)
                    return (0);
                //Summary.WriteMessage(this, "canLeave:" + Crop.IsReadyForHarvesting);
                return Crop.IsReadyForHarvesting ? 1 : 0;
            }
        }

        public void HarvestCrop()
        {
            Crop.Harvest();
            Crop.EndCrop();
        }
    }
}
```
        Manager SowingFertiliserMaize
          Amount = 160
          CropName = maize
```csharp
using Models.PMF;
using Models.Core;
using System;
using System.Linq;
namespace Models
{
    [Serializable]
    public class Script : Model
    {
        [Link] Clock Clock;
        [Link] Fertiliser Fertiliser;
        [Link] Summary Summary;
        
        
        [Description("Amount of fertiliser to be applied (kg/ha)")]
        public double Amount { get; set;}
        
        [Description("Crop to be fertilised")]
        public string CropName { get; set;}
        
        
        

        [EventSubscribe("Sowing")]
        private void OnSowing(object sender, EventArgs e)
        {
            Model crop = sender as Model;
            if (crop.Name.ToLower()==CropName.ToLower())
                Fertiliser.Apply(Amount: Amount, Type: Fertiliser.Types.NO3N);
        }
        
    }
}
```
        Plant Wheat
        Manager WheatManager
          Crop = [Wheat]
          Verbose = True
          StartDate = 1-apr
          EndDate = 10-jun
          MinESW = 50
          MinRain = 10
          RainDays = 7
          MustSow = True
          CultivarName = Hartog
          SowingDepth = 30
          RowSpacing = 250
          Population = 120
```csharp
using Models.Interfaces;
using APSIM.Shared.Utilities;
using Models.Utilities;
using Models.Soils;
using Models.PMF;
using Models.Core;
using System;
using System.Linq;
using Models.Climate;

namespace Models
{
    [Serializable]
    public class Script : Model
    {
        [Link] private Clock Clock;
        [Link] private Summary Summary;
        [Link] private Soil Soil;
        private Accumulator accumulatedRain;
        [Link]
        private ISoilWater waterBalance;

        [Separator("Script Configuration")]
        [Description("Crop to manage")]
        public IPlant Crop { get; set; }
        [Description("Run script in verbose mode?")]
        [Tooltip("If enabled, the script will print a large number of diagnostics to the summary file, to aid debugging")]
        public bool Verbose { get; set; }

        [Separator("Sowing Conditions")]
        [Description("Start of sowing window (d-mmm)")]
        public string StartDate { get; set;}
        [Description("End of sowing window (d-mmm)")]
        public string EndDate { get; set;}
        [Description("Minimum extractable soil water for sowing (mm)")]
        public double MinESW { get; set;}
        [Description("Accumulated rainfall required for sowing (mm)")]
        public double MinRain { get; set;}
        [Description("Duration of rainfall accumulation (d)")]
        public int RainDays { get; set;}

        [Tooltip("If enabled, and if sowing conditions are not met, the crop will be sown on the final day of the sowing window.")]
        [Description("Must sow (yes/no)")]
        public bool MustSow { get; set;}
        [Separator("Sowing Properties")]
        [Description("Cultivar to be sown")]
        [Display(Type=DisplayType.CultivarName)]
        public string CultivarName { get; set;}
        [Description("Sowing depth (mm)")]
        public double SowingDepth { get; set;}        
        [Description("Row spacing (mm)")]
        public double RowSpacing { get; set;}    
        [Description("Plant population (/m2)")]
        public double Population { get; set;}    

        private bool afterInit = false;

        [EventSubscribe("StartOfSimulation")]
        private void OnSimulationCommencing(object sender, EventArgs e)
        {
            if (Crop == null) { throw new Exception("Crop must not be null in rotations"); }
            accumulatedRain = new Accumulator(this, "[Weather].Rain", RainDays);
            afterInit = true;
            Summary.WriteMessage(this, this.FullPath + " - Commence, crop=" + (Crop as Model).Name);
        }
        
        [EventSubscribe("DoManagement")]
        private void DoManagement(object sender, EventArgs e)
        {
            accumulatedRain.Update();
        }

        // Test whether we can sow a crop today
        // +ve number - yes
        // 0          - no
        // -ve number - no, out of scope (planting window)
        [Units("0-1")]
        public bool CanSow
        {
            get
            {
                if (!afterInit)
                    return false;
                bool isPossibleToday = false;
                bool inWindow = DateUtilities.WithinDates(StartDate, Clock.Today, EndDate);
                bool endOfWindow = DateUtilities.DatesEqual(EndDate, Clock.Today);
                if (! Crop.IsAlive && inWindow && accumulatedRain.Sum > MinRain && MathUtilities.Sum(waterBalance.ESW) > MinESW) 
                    isPossibleToday = true;

                   if (Verbose)
                {
                    if (isPossibleToday)
                        Summary.WriteMessage(this, "Sowing is possible today");
                    else if (!Crop.IsAlive && endOfWindow && MustSow)
                        Summary.WriteMessage(this, "Sowing is possible today, but conditions are not ideal. Only sowing because MustSow is set to yes");
                    else if (Crop.IsAlive)
                        Summary.WriteMessage(this, "Not sowing today because crop is already alive");
                    else if (!inWindow)
                        Summary.WriteMessage(this, string.Format("Not sowing today because current date ({0}) is not in sowing window ({1} - {2}).", Clock.Today.ToString("dd-MMM"), StartDate, EndDate));
                    else if (!(accumulatedRain.Sum > MinRain))
                        Summary.WriteMessage(this, string.Format("Not sowing today because accumulated rain ({0}) is less than min rain required for sowing ({1})", accumulatedRain.Sum, MinRain));
                    else if (!(MathUtilities.Sum(waterBalance.ESW) > MinESW))
                        Summary.WriteMessage(this, string.Format("Not sowing today because ESW ({0}) is less than min ESW required for sowing ({1})", MathUtilities.Sum(waterBalance.ESW), MinESW));
                }

               if (isPossibleToday)
                   return true;

               if (! Crop.IsAlive && endOfWindow && MustSow) 
                   return true;

               if (! Crop.IsAlive && !inWindow)
                   return false;

               return false;
            }
        }

        public void SowCrop()
        {
           Summary.WriteMessage(this, this.FullPath + " -  sowing " + (Crop as Model).Name);
           Crop.Sow(population:Population, cultivar:CultivarName, depth:SowingDepth, rowSpacing:RowSpacing);    
        }

        [Units("0-1")]
        public int CanHarvest
        {
           get
           {
             if (!afterInit)
                 return 0;
             return Crop.IsReadyForHarvesting ? 1 : 0;
           }
        }

        public void HarvestCrop(string msg)
        {
           Summary.WriteMessage(this, "Harvesting crop " + (Crop as IModel).Name + ". Message: " + msg);
           Crop.Harvest();
           Crop.EndCrop();
        }
    }
}
```
        Manager SowingFertiliserWheat
          Amount = 160
          CropName = wheat
          script: same as in Mar.Mar.Field.SowingFertiliserMaize
        Report TransitionReport: EventNames=[RotationManager].Transition
          VariableNames:
            [Clock].Today
            [Clock].Today.DayOfYear
            [RotationManager].CurrentState
        Report: EventNames=[Clock].EndOfDay
          VariableNames:
            [Clock].Today
            [RotationManager].CurrentState
            [Wheat].Phenology.Zadok.Stage
            [Wheat].Phenology.CurrentStageName
            [Wheat].IsAlive
            [Wheat].IsReadyForHarvesting
            [Wheat].AboveGround.Wt
            [Wheat].AboveGround.N
            [Wheat].Grain.Total.Wt*10 as WheatYield
            [Maize].Grain.Total.Wt*10 as MaizeYield
            [Wheat].Grain.Protein
            [Wheat].Grain.Size
            [Wheat].Grain.Number
            [Wheat].Grain.Total.Wt
            [Wheat].Grain.Total.N
            [Wheat].Total.Wt
            Sum([Soil].SoilWater.ESW) as ESW
            [Soil].SoilWater.Es as ESoil
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