Simulations: Version=195
  DataStore
  Simulation SCRUMSinglePlantingFromManager
    Memo Description
      This example runs scrum in the simplest way.   The necessary components in the Field are:
      * the SCRUM model.
      * A SCRUMCropInstance, named SCRUMCereal in this case but the name can be anything.
      * A manager model called EstablishCrop that sets the management information for SCRUMCereal on the first day and establishes the crop on the appropriate day.
    Weather: FileName=%root%/Examples/WeatherFiles/NZ_Lincoln.met
    Clock: Start=2000-07-01; End=2001-06-30
    Summary
    SoilArbitrator Soil Arbitrator
    Zone Field: Area=1; Slope=0; AspectAngle=0; Altitude=50
      Soil: Latitude=0; Longitude=0
        Chemical: PHUnits=Water
          Thickness  PH   CEC
          100        6.6  12.44
          200        6.2  11.6525
          300        5.7  11.045
          300        5.5  10.6625
          300        5.5  9.4025
          300        5.5  9.4025
          CEC source: Calculated
        Water: Thickness=[100, 200, 300, 300, 300, 300]; InitialValues=[0.33, 0.33, 0.31, 0.15, 0.1, 0.06]; InitialPAWmm=180; RelativeTo=LL15; FilledFromTop=false
        Physical
          Thickness  ParticleSizeSand  ParticleSizeSilt  ParticleSizeClay  Rocks     BD   AirDry  LL15  DUL   SAT
          100        5                 65                30                0         1.2  0.08    0.13  0.33  0.5
          200        5                 65                30                0         1.2  0.13    0.13  0.33  0.5
          300        5                 65                30                0.135336  1.2  0.1     0.1   0.31  0.44
          300        5                 65                30                0         1.2  0.06    0.06  0.15  0.46
          300        5                 65                30                0.135336  1.2  0.04    0.04  0.1   0.44
          300        5                 65                30                0.135336  1.2  0.02    0.02  0.06  0.44
          Rocks, ParticleSizeSand, ParticleSizeSilt, ParticleSizeClay source: Calculated
          SoilCrop SCRUMSoil: LL=[0.13, 0.13, 0.1, 0.08, 0.11, 0.11]; KL=[0.1, 0.1, 0.1, 0.1, 0.1, 0.1]; XF=[1, 1, 1, 1, 1, 1]
          SoilCrop PotatoSoil: LL=[0.13, 0.13, 0.27, 0.27, 0.3, 0.3]; KL=[0.1, 0.06, 0.03, 0.01, 0, 0]; XF=[1, 1, 0.1, 0, 0, 0]
        WaterBalance SoilWater: SummerDate=1-Nov; SummerU=9; SummerCona=4.4; WinterDate=1-Apr; WinterU=9; WinterCona=4.4; DiffusConst=88; DiffusSlope=35.4; Salb=0.18; CN2Bare=68; CNRed=20; CNCov=0.8; DischargeWidth=0; CatchmentArea=0; PSIDul=-100
          Thickness  SWCON  KLAT
          100        0.55   0
          200        0.55   0
          300        0.55   0
          300        0.55   0
          300        0.55   0
          300        0.55   0
        Nutrient
        Organic: FOMCNRatio=30; CarbonUnits=Total
          Thickness  Carbon  SoilCNRatio  FBiom  FInert  FOM
          100        1.82    11.5         0.025  0.3     1243.93
          200        1.47    11.5         0.025  0.4     833.832
          300        1.2     11.5         0.015  0.75    457.617
          300        1.03    11.5         0.01   0.9     251.145
          300        0.47    11.5         0.01   0.96    137.831
          300        0.47    11.5         0.01   0.96    75.6435
        LayerStructure
          Thickness=[100, 100, 100, 100, 100, 100, 100, 100, 100, 100, 100, 100, 100, 100, 100]
        Solute NO3: Thickness=[100, 200, 300, 300, 300, 300]; InitialValues=[225, 12.5, 1.38889, 1.38889, 0, 0]; InitialValuesUnits=ppm; WaterTableConcentration=0; D0=0; DepthConstant=0; MaxDepthSoluteAccessible=0; RunoffEffectivenessAtMovingSolute=0; MaxEffectiveRunoff=0
        Solute NH4: Thickness=[100, 200, 300, 300, 300, 300]; InitialValues=[0, 0, 0, 0, 0, 0]; InitialValuesUnits=ppm; WaterTableConcentration=0; D0=0; DepthConstant=0; MaxDepthSoluteAccessible=0; RunoffEffectivenessAtMovingSolute=0; MaxEffectiveRunoff=0
        Solute Urea: Thickness=[100, 200, 300, 300, 300, 300]; InitialValues=[0, 0, 0, 0, 0, 0]; InitialValuesUnits=kg/ha; WaterTableConcentration=0; D0=0; DepthConstant=0; MaxDepthSoluteAccessible=0; RunoffEffectivenessAtMovingSolute=0; MaxEffectiveRunoff=0
        SoilTemperature Temperature
      SurfaceOrganicMatter: InitialResidueName=wheat; InitialResidueType=wheat; InitialResidueMass=2000; InitialStandingFraction=0; InitialCPR=0; InitialCNR=80
      MicroClimate: a_interception=0; b_interception=1; c_interception=0; d_interception=0; SoilHeatFluxFraction=0.4; MinimumHeightDiffForNewLayer=0; NightInterceptionFraction=0.5; ReferenceHeight=2
      Plant SCRUM
      Irrigation
      Fertiliser
      Manager EstablishCrop
        CropName = ScrumCereal
        EstablishDates = 15-sep
        EstablishStage = Seed
        PlantingDepth = 15
        HarvestTimeOption = SettingThermalTime
        HarvestDate = 01/01/0001 00:00:00
        Tt_EstablishToHarvest = 1500
        HarvestStage = Maturity
        ExpectedYield = 8
        FieldLoss = 0
        ResidueRemoval = 0
        ResidueIncorporation = 1
        ResidueIncorporationDepth = 150
```csharp
using System;
using System.Linq;
using APSIM.Shared.Utilities;
using Models.Core;
using Models.Soils;
using Models.PMF;
using Models.PMF.SimplePlantModels;
using Models.Utilities;

namespace Models
{
    [Serializable]
    public class Script : Model
    {
        [Link] Clock clock;
        [Link] Zone zone;
        [Link(Type = LinkType.Scoped, ByName = true)]
        public Plant scrum = null;

        [Separator("Define the SCRUM crop to plant and its basic management")]

        /// <summary>SCRUM crop to stablish</summary>
        [Description("Chose the crop to plant:")]
        [Display(Type = DisplayType.SCRUMcropName)]
        public string CropName { get; set; }

        [Separator("Specify establishment and harvest conditions for this crop")]

        /// <summary>Date to establishment the crop</summary>
        [Description("Establishment dates, comma seperated (dd-mmm or dd/mm/yyyy):")]
        public string[] EstablishDates { get; set; }

        /// <summary>Stages at which the SCRUM is established</summary>
        [Description("Choose the establishment stage")]
        [Display(Type = DisplayType.ScrumEstablishStages)]
        public string EstablishStage {get; set;}

        /// <summary>Depth at which the crop/seeds are planted.</summary>
        [Description(" Planting depth (mm):")]
        public double PlantingDepth { get; set; }

        /// <summary>Choice on how the duration of crop is defined</summary>
        [Description("Choose how the crop cycle is defined:")]
        public HarvestTimingOption HarvestTimeOption {get; set;}

        private bool isHarvestDateDefined { get { return HarvestTimeOption == HarvestTimingOption.SettingDate; } }
        private bool isThermalTimeDefined { get { return HarvestTimeOption == HarvestTimingOption.SettingThermalTime; } }

        /// <summary>Date to establishment the crop</summary>
        [Description("  Harvest date (dd/mm/yyyy):")]
        [Display(VisibleCallback = "isHarvestDateDefined")]
        public DateTime HarvestDate { get; set; }

        /// <summary>Thermal time from establishment to harvest (if blank or zero must specify harvest date)</summary>
        [Description("  Thermal time from establishment to harvest (oCd):")]
        [Display(VisibleCallback = "isThermalTimeDefined")]
        public double Tt_EstablishToHarvest { get; set; }

        /// <summary>Stage at which the crop is to be harvested at</summary>
        [Description("Choose the stage to harvest the crop:")]
        [Display(Type = DisplayType.ScrumHarvestStages)]
        public string HarvestStage {get; set;}

        [Separator("Specify an appropriate potential yield for the crop (based on assumed genotype, sowing date, and local conditions)\n" +
                   "  *SCRUM will reduce yield if water or N stress are predicted")]

        /// <summary>Expected crop yield (t FW/ha)</summary>
        [Description("Potential crop yield, fresh weight (t/ha)")]
        public double ExpectedYield {get; set;}

        [Separator("Specify proportions of field loss and residue removal at harvest")]

        /// <summary>Proportion of product that is left in the field at harvest (due to disease, market, ect.)</summary>
        [Description("Proportion of product lost in the field at harvest (0-1):")]
        public double FieldLoss { get; set; }

        /// <summary>Proportion of stover that is removed from the field at harvest (e.g., bailing)</summary>
        [Description("Proportion of stover removed from the field at harvest (0-1):")]
        public double ResidueRemoval { get; set; }

        /// <summary>Proportion of residues that is incorporated by cultivation after harvest</summary>
        [Description("Proportion of residue incorporated to soil at harvest (0-1):")]
        public double ResidueIncorporation { get; set; }

        /// <summary>Depth down to which the residues that are incorporated to by cultivation after harvest</summary>
        [Description("Depth to incorporate residues (mm):")]
        public double ResidueIncorporationDepth { get; set; }

        private ScrumManagementInstance management;


        [EventSubscribe("DoManagement")]
        private void OnDoManagement(object sender, EventArgs e)
        {
            foreach (string date in EstablishDates)
                {
                    DateTime estabDate = DateUtilities.GetDate(date, clock.Today.Year);
                    if (DateTime.Compare(clock.Today, estabDate) == 0)
                    {
                        if (isHarvestDateDefined && (HarvestDate <= clock.Today))
                        {
                            throw new Exception("Harvest date is earlier than establishment date");
                        }

                        management = new ScrumManagementInstance(cropName: CropName,
                                                                 establishDate: clock.Today,
                                                                 establishStage: EstablishStage,
                                                                 plantingDepth: PlantingDepth,
                                                                 harvestStage: HarvestStage,
                                                                 expectedYield: ExpectedYield,
                                                                 harvestDate: isHarvestDateDefined? HarvestDate : null,
                                                                 ttEstablishmentToHarvest: isThermalTimeDefined? Tt_EstablishToHarvest: double.NaN,
                                                                 fieldLoss: FieldLoss,
                                                                 residueRemoval: ResidueRemoval,
                                                                 residueIncorporation: ResidueIncorporation,
                                                                 residueIncorporationDepth: ResidueIncorporationDepth);
                        ScrumCropInstance currentCrop = zone.FindDescendant<ScrumCropInstance>(CropName);
                        currentCrop.Establish(management);
                    }
               }
        }

        /// <summary>Flag how harvest time is defined.</summary>
        public enum HarvestTimingOption
        {
            /// <summary>A date is to be used.</summary>
            SettingDate,
            /// <summary>A given thermal time sum is to be used.</summary>
            SettingThermalTime
        }
    }
}
```
      Manager AutomaticIrrigation
        IrrigationIsEnabled = True
        SeasonStartDate = 1-Sep
        SeasonEndDate = 30-Apr
        OnlyApplyOntoCrop = True
        SeasonsAllocation = 1000
        TriggerFraction = 0.8
        RefillFraction = 0.95
        MaximumIrrigationAmount = 40
        ReturnDays = 3
        DepthToMonitor = 600
        LimitMonitoringDepth = True
```csharp
// This script can be used to apply irrigation automatically, based soil water status
// Blame to RCichota, last updated in 18/Mar/2025

using System;
using System.Xml.Serialization;
using Newtonsoft.Json;
using APSIM.Shared.Utilities;
using Models.Core;
using Models.Soils;
using Models.PMF;
using Models.Interfaces;
using Models.Soils.Nutrients;

namespace Models
{
    [Serializable]
    [System.Xml.Serialization.XmlInclude(typeof(Model))]
    public class Script : Model
    {
        //Communication to other modules
        [Link] private Clock clock;
        [Link] private ISummary summary;
        [Link] private IPhysical soilPhysical;
        [Link] private ISoilWater waterBalance;
        [Link] private Irrigation Irrigation;
        [Link] private Plant SCRUM;

        //User inputs from properties tab
        [Separator("Generic irrigation management")]
        [Description(" Enable automatic irrigation management?              ")]
        public bool IrrigationIsEnabled {get; set;}

        [Description(" Date to start the irrigation season (dd-mmm):")]
        [Display(VisibleCallback = "IrrigationIsEnabled")]
        public string SeasonStartDate {get; set;}

        [Description(" Date to end the irrigation season (dd-mmm):")]
        [Display(VisibleCallback = "IrrigationIsEnabled")]
        public string SeasonEndDate {get; set;}

        [Description(" Only irrigate if there is a crop on the field?")]
        [Display(VisibleCallback = "IrrigationIsEnabled")]
        public bool OnlyApplyOntoCrop {get; set;}

        [Description(" Season allocation (mm):")]
        [Display(VisibleCallback = "IrrigationIsEnabled")]
        public double SeasonsAllocation {get; set;}

        [Description(" Fraction of PAWC to trigger irrigation (0-1):")]
        [Display(VisibleCallback = "IrrigationIsEnabled")]
        public double TriggerFraction {get; set;}

        [Description(" Fraction of PAWC to refill soil to (0-1):")]
        [Display(VisibleCallback = "IrrigationIsEnabled")]
        public double RefillFraction {get; set;}

        [Description(" Maximum irrigation amount per application (mm):")]
        [Display(VisibleCallback = "IrrigationIsEnabled")]
        public double MaximumIrrigationAmount {get; set;}

        [Description(" Minimum number of days between irrigations:")]
        [Display(VisibleCallback = "IrrigationIsEnabled")]
        public double ReturnDays {get; set;}

        [Description(" Depth to calculate PAWC (mm):")]
        [Display(VisibleCallback = "IrrigationIsEnabled")]
        public double DepthToMonitor {get; set;}

        [Description(" Limit the depth to the rooting depth?")]
        [Display(VisibleCallback = "IrrigOnAndOnlyOnCrops")]
        public bool LimitMonitoringDepth {get; set;}

        //Class members
        [JsonIgnore] public bool SeasonIsOpen {get; set;}
        [JsonIgnore] private bool CropIsActive {get; set;}
        [JsonIgnore] private bool IrrigatorIsAvailable {get; set;}
        [JsonIgnore] private bool SoilIsDry {get; set;}
        [JsonIgnore] private bool WaterIsAvailable {get; set;}

        [JsonIgnore] public double MonitoredLayerTrigger {get; set;}
        [JsonIgnore] public double MonitoredLayerTarget {get; set;}
        [JsonIgnore] public double MonitoredLayerDUL {get; set;}
        [JsonIgnore] public double MonitoredLayerLL {get; set;}
        [JsonIgnore] public double MonitoredLayerSW {get; set;}
        [JsonIgnore] public double MonitoredLayerPAWC {get; set;}
        [JsonIgnore] public double MonitoredLayerPAW {get; set;}
        [JsonIgnore] public double MonitoredDepth {get; set;}

        [JsonIgnore] public double AmountToApply {get; set;}
        [JsonIgnore] public double SeasonAppliedAmount {get; set;}
        [JsonIgnore] public double DaysSinceLastApplication {get; set;}

        //Internal Variables
        private bool IrrigOnAndOnlyOnCrops
        { get {return IrrigationIsEnabled && OnlyApplyOntoCrop; }}
        private double lastLayerFraction;
        private int lastLayer;


        [EventSubscribe("StartOfSimulation")]
        private void OnStartOfSimulation(object sender, EventArgs e)
        {
            // initialise some variables
            DaysSinceLastApplication = ReturnDays;
            if (!OnlyApplyOntoCrop)
            {
                LimitMonitoringDepth = false;
            }

            // calculate soil water variables
            calculateWaterThresholds(DepthToMonitor);
            MonitoredLayerTrigger = MonitoredLayerLL + MonitoredLayerPAWC*TriggerFraction;
            MonitoredLayerTarget = MonitoredLayerLL + MonitoredLayerPAWC*RefillFraction;
            MonitoredDepth = DepthToMonitor;
        }

        [EventSubscribe("StartOfDay")]
        private void OnStartOfDay(object sender, EventArgs e)
        {
            // check whether we are starting a new season, zero amount
            if (DateUtilities.DatesAreEqual(SeasonStartDate, clock.Today))
            {
                SeasonAppliedAmount = 0.0;
            }
        }

        [EventSubscribe("DoManagement")]
        private void OnDoManagement(object sender, EventArgs e)
        {
            // get the current amount of water in the soil
            if (LimitMonitoringDepth)
            { // get the current rooting depth, no less than 50mm, no more than DepthToMonitor
                MonitoredDepth = DepthToMonitor;
                if (SCRUM.IsAlive)
                {
                    MonitoredDepth = Math.Min(DepthToMonitor, Math.Max(50.0, SCRUM.Root.Depth));
                }

                // re-calculate the soil water variables
                calculateWaterThresholds(MonitoredDepth);
                MonitoredLayerTrigger = MonitoredLayerLL + MonitoredLayerPAWC*TriggerFraction;
                MonitoredLayerTarget = MonitoredLayerLL + MonitoredLayerPAWC*RefillFraction;
            }

            calculateSoilWater(MonitoredDepth);

            // check water status and management conditions, if we can irrigate at all
            if (IrrigationIsEnabled)
            {
                DaysSinceLastApplication += 1;

                // are we within the irrigation season?
                SeasonIsOpen = false;
                if (DateUtilities.WithinDates(SeasonStartDate, clock.Today, SeasonEndDate))
                {
                    SeasonIsOpen = true;
                }

                // is there a crop in the ground that needs irrigation?
                CropIsActive = true;
                if (OnlyApplyOntoCrop)
                {
                    CropIsActive = false;
                    if (SCRUM.IsAlive)
                    {
                        CropIsActive = true;
                    }
                }

                // is the irrigator available?
                IrrigatorIsAvailable = false;
                if (DaysSinceLastApplication >= ReturnDays)
                {
                    IrrigatorIsAvailable = true;
                }

                // is the soil dry enough to require irrigation?
                SoilIsDry = false;
                if (MonitoredLayerSW <= MonitoredLayerTrigger)
                {
                    SoilIsDry = true;
                }

                // is there water available, within allocation?
                WaterIsAvailable = false;
                if (SeasonAppliedAmount < SeasonsAllocation)
                {
                    WaterIsAvailable = true;
                }

                //Lets bloody well irrigate then!!!!
                if (SeasonIsOpen && CropIsActive && IrrigatorIsAvailable && SoilIsDry && WaterIsAvailable)
                {
                    AmountToApply = MonitoredLayerTarget - MonitoredLayerSW;
                    AmountToApply = Math.Min(AmountToApply, MaximumIrrigationAmount);
                    AmountToApply = Math.Min(AmountToApply, SeasonsAllocation - SeasonAppliedAmount);
                    AmountToApply = Math.Max(AmountToApply, 0.0);
                    Irrigation.Apply(amount: AmountToApply, depth: 0.0);
                    DaysSinceLastApplication = 0;
                    SeasonAppliedAmount += AmountToApply;
                    summary.WriteMessage(this, "Automatic irrigation  applied, " + AmountToApply.ToString("#0.0") + " mm", MessageType.Diagnostic);
                }
            }
        }

        // computes the water thresholds in the soil down to a given depth
        private void calculateWaterThresholds(double depthToCalculate)
        {
            MonitoredLayerLL = 0.0;
            MonitoredLayerDUL = 0.0;
            double accumulatedDepth = 0.0;
            lastLayerFraction = 0.0;
            lastLayer = 0;
            for (int layer = 0; accumulatedDepth <= depthToCalculate; layer++)
            {
                double layerFraction = (depthToCalculate - accumulatedDepth)/soilPhysical.Thickness[layer];
                layerFraction = Math.Min(1.0, Math.Max(0.0, layerFraction));
                MonitoredLayerLL += soilPhysical.LL15mm[layer]*layerFraction;
                MonitoredLayerDUL += soilPhysical.DULmm[layer]*layerFraction;
                accumulatedDepth += soilPhysical.Thickness[layer];
                if (accumulatedDepth >= depthToCalculate)
                {
                    lastLayerFraction = layerFraction;
                    lastLayer = layer;
                }
            }

            MonitoredLayerPAWC = MonitoredLayerDUL - MonitoredLayerLL;
        }

        // computes the amount of water in the soil down to a given depth
        private void calculateSoilWater(double depthToCalculate)
        {
            MonitoredLayerSW = 0.0;
            double accumulatedDepth = 0.0;
            for (int layer = 0; accumulatedDepth <= depthToCalculate; layer++)
            {
                if (layer < lastLayer)
                {
                    MonitoredLayerSW += waterBalance.SWmm[layer];
                }
                else
                {
                    MonitoredLayerSW += waterBalance.SWmm[layer]*lastLayerFraction;
                }

                accumulatedDepth += soilPhysical.Thickness[layer];
            }

            MonitoredLayerPAW = Math.Max(0.0, MonitoredLayerSW - MonitoredLayerLL);
        }
    }
}
```
      Manager AutomaticFertiliser
        FertiliserIsEnabled = True
        SeasonStartDate = 1-Aug
        SeasonEndDate = 30-Apr
        OnlyApplyOntoCrop = False
        SeasonsAllocation = 1000
        TriggerSoilN = 50
        AmountToApply = 25
        FertiliserType = UreaN
        ReturnDays = 3
        DepthToMonitor = 300
        LimitMonitoringDepth = False
```csharp
// This script can be used to apply N fertiliser automatically, based soil mineral N status
// Blame to RCichota, last updated in 18/Mar/2025

using System;
using System.Xml.Serialization;
using Newtonsoft.Json;
using APSIM.Shared.Utilities;
using Models.Core;
using Models.Soils;
using Models.PMF;
using Models.Interfaces;
using Models.Soils.Nutrients;

namespace Models
{
    [Serializable]
    [System.Xml.Serialization.XmlInclude(typeof(Model))]
    public class Script : Model
    {
        //Communication to other modules
        [Link] private Clock clock;
        [Link] private ISummary summary;
        [Link] private IPhysical soilPhysical;
        [Link] private INutrient soilNutrient;
        [Link] private Fertiliser Fertiliser;
        [Link] private Plant SCRUM;

        //User inputs from properties tab
        [Separator("Generic N fertiliser management")]
        [Description(" Enable automatic fertiliser management?                           ")]
        public bool FertiliserIsEnabled {get; set;}

        [Description(" Date to start the fertiliser season (dd-mmm):")]
        [Display(VisibleCallback = "FertiliserIsEnabled")]
        public string SeasonStartDate {get; set;}

        [Description(" Date to end the fertiliser season (dd-mmm):")]
        [Display(VisibleCallback = "FertiliserIsEnabled")]
        public string SeasonEndDate {get; set;}

        [Description(" Only fertilise if there is a crop on the field?")]
        [Display(VisibleCallback = "FertiliserIsEnabled")]
        public bool OnlyApplyOntoCrop {get; set;}

        [Description(" Season allocation (kg N/ha):")]
        [Display(VisibleCallback = "FertiliserIsEnabled")]
        public double SeasonsAllocation {get; set;}

        [Description(" Minimum soil mineral N, trigger an application (kg N/ha):")]
        [Display(VisibleCallback = "FertiliserIsEnabled")]
        public double TriggerSoilN {get; set;}

        [Description(" Fertiliser N amount per application (kg N/ha):")]
        [Display(VisibleCallback = "FertiliserIsEnabled")]
        public double AmountToApply {get; set;}

        [Description(" Type of fertiliser to apply:")]
        [Display(VisibleCallback = "FertiliserIsEnabled", Type = DisplayType.FertiliserType)]
        public string FertiliserType { get; set; }

        [Description(" Minimum number of days between applications:")]
        [Display(VisibleCallback = "FertiliserIsEnabled")]
        public double ReturnDays {get; set;}

        [Description(" Depth to calculate soil mineral N (mm):")]
        [Display(VisibleCallback = "FertiliserIsEnabled")]
        public double DepthToMonitor {get; set;}

        [Description(" Limit the depth to the rooting depth?")]
        [Display(VisibleCallback = "FertOnAndOnlyOnCrops")]
        public bool LimitMonitoringDepth {get; set;}

        //Class members
        [JsonIgnore] public bool SeasonIsOpen {get; set;}
        [JsonIgnore] private bool CropIsActive {get; set;}
        [JsonIgnore] private bool SpreaderIsAvailable {get; set;}
        [JsonIgnore] private bool SoilNitrogenIsLow {get; set;}
        [JsonIgnore] private bool FertiliserIsAvailable {get; set;}

        [JsonIgnore] public double MonitoredLayerSoilN {get; set;}
        [JsonIgnore] public double MonitoredDepth {get; set;}

        [JsonIgnore] public double SeasonAppliedAmount {get; set;}
        [JsonIgnore] public double DaysSinceLastApplication {get; set;}

        //Internal Variables
        private bool FertOnAndOnlyOnCrops
        { get {return FertiliserIsEnabled && OnlyApplyOntoCrop; }}


        [EventSubscribe("StartOfSimulation")]
        private void OnStartOfSimulation(object sender, EventArgs e)
        {
            // initialise some variables
            DaysSinceLastApplication = ReturnDays;
            if (!OnlyApplyOntoCrop)
            {
                LimitMonitoringDepth = false;
            }

            MonitoredDepth = DepthToMonitor;
        }

        [EventSubscribe("StartOfDay")]
        private void OnStartOfDay(object sender, EventArgs e)
        {
            // check whether we are starting a new season, zero amount
            if (DateUtilities.DatesAreEqual(SeasonStartDate, clock.Today))
            {
                SeasonAppliedAmount = 0.0;
            }
        }

        [EventSubscribe("DoManagement")]
        private void OnDoManagement(object sender, EventArgs e)
        {
            // get the current amount of nitrogen in the soil
            if (LimitMonitoringDepth)
            { // get the current rooting depth, no less than 50mm, no more than DepthToMonitor
                MonitoredDepth = DepthToMonitor;
                if (SCRUM.IsAlive)
                {
                    MonitoredDepth = Math.Min(DepthToMonitor, Math.Max(50.0, SCRUM.Root.Depth));
                }
            }

            calculateSoilMineralNitrogen(MonitoredDepth);

            // check N status and management conditions, if we can fertilise at all
            if (FertiliserIsEnabled)
            {
                DaysSinceLastApplication += 1;

                // are we within the irrigation season?
                SeasonIsOpen = false;
                if (DateUtilities.WithinDates(SeasonStartDate, clock.Today, SeasonEndDate))
                {
                    SeasonIsOpen = true;
                }

                // is there a crop in the ground that needs fertiliser?
                CropIsActive = true;
                if (OnlyApplyOntoCrop)
                {
                    CropIsActive = false;
                    if (SCRUM.IsAlive)
                    {
                        CropIsActive = true;
                    }
                }

                // is the spreader available?
                SpreaderIsAvailable = false;
                if (DaysSinceLastApplication >= ReturnDays)
                {
                    SpreaderIsAvailable = true;
                }

                // is the soil N low enough to require fertiliser?
                SoilNitrogenIsLow = false;
                if (MonitoredLayerSoilN <= TriggerSoilN)
                {
                    SoilNitrogenIsLow = true;
                }

                // is there N fertiliser available, within allocation?
                FertiliserIsAvailable = false;
                if (SeasonAppliedAmount < SeasonsAllocation)
                {
                    FertiliserIsAvailable = true;
                }

                //Lets bloody well fertilise then!!!!
                if (SeasonIsOpen && CropIsActive && SpreaderIsAvailable && SoilNitrogenIsLow && FertiliserIsAvailable)
                {
                    AmountToApply = Math.Min(AmountToApply, SeasonsAllocation - SeasonAppliedAmount);
                    AmountToApply = Math.Max(AmountToApply, 0.0);
                    Fertiliser.Apply(amount: AmountToApply, type: FertiliserType, depth: 10.0);
                    DaysSinceLastApplication = 0;
                    SeasonAppliedAmount += AmountToApply;
                    summary.WriteMessage(this, "Automatic N fertiliser applied, " + AmountToApply.ToString("#0.0") + " kgN/ha", MessageType.Diagnostic);
                }
            }
        }

        // computes the amount of mineral N in the soil down to a given depth
        private void calculateSoilMineralNitrogen(double depthToCalculate)
        {
            MonitoredLayerSoilN = 0.0;
            double accumulatedDepth = 0.0;
            for (int layer = 0; accumulatedDepth <= depthToCalculate; layer++)
            {
                double layerFraction = (depthToCalculate - accumulatedDepth)/soilPhysical.Thickness[layer];
                layerFraction = Math.Min(1.0, Math.Max(0.0, layerFraction));
                MonitoredLayerSoilN += (soilNutrient.MineralN[layer])*layerFraction;
                accumulatedDepth += soilPhysical.Thickness[layer];
            }
        }
    }
}
```
      Report: EventNames=[Clock].DoReport
        VariableNames:
          [Clock].Today
          [SCRUM].SowingData.Cultivar
          // SCRUM Biomass
          [SCRUM].Total.Wt
          [SCRUM].Total.N
          [SCRUM].TotalDMAtHarvest
          [SCRUM].Product.Live.Wt
          [SCRUM].Product.Live.N
          [SCRUM].Product.Live.NConc
          [SCRUM].Product.DMAtHarvest
          [SCRUM].Product.ExpectedYield
          [SCRUM].Product.DryMatterContent
          [SCRUM].Product.Yield
          [SCRUM].Stover.Live.Wt
          [SCRUM].Stover.Live.N
          [SCRUM].Stover.Live.NConc
          [SCRUM].Stover.DMAtHarvest
          [SCRUM].Stover.Height
          [SCRUM].Stover.LAI
          [SCRUM].Stover.LAIDead
          [SCRUM].Stover.LAITotal
          [SCRUM].Stover.CoverDead
          [SCRUM].Stover.CoverGreen
          [SCRUM].Stover.CoverTotal
          [SCRUM].Root.Live.Wt
          [SCRUM].Root.Live.N
          [SCRUM].Root.Live.NConc
          [SCRUM].Root.DMatHarvest
          [SCRUM].Root.Depth
          // SCRUM Phenology
          [SCRUM].Phenology.AccumulatedEmergedTt
          [SCRUM].Phenology.AccumulatedTt
          [SCRUM].Phenology.CurrentPhaseName
          [SCRUM].Phenology.CurrentStageName
          [SCRUM].Phenology.Stage
          [SCRUM].Phenology.ThermalTime
          // SCRUM Allocation
          [SCRUM].Product.DMDemands.Structural.DMDemandFunction.PartitionFraction
          [SCRUM].Stover.DMDemands.Structural.DMDemandFunction.PartitionFraction
          [SCRUM].Root.DMDemands.Structural.DMDemandFunction.PartitionFraction
          [SCRUM].Arbitrator.DM.TotalPlantDemand
          [SCRUM].Arbitrator.DM.TotalFixationSupply
          [SCRUM].Arbitrator.N.TotalPlantDemand
          [SCRUM].Arbitrator.N.TotalPlantSupply
          [SCRUM].Arbitrator.N.TotalPlantSupply
          [SCRUM].Product.Allocated.Wt
          [SCRUM].Stover.Allocated.Wt
          [SCRUM].Root.Allocated.Wt
          // SCRUM limiting factors
          [SCRUM].Arbitrator.DM.NutrientLimitation
          [SCRUM].Arbitrator.DM.SinkLimitation
          [SCRUM].Arbitrator.FN
          [SCRUM].Stover.Fn
          [SCRUM].Stover.Fw
          // Water balance
          sum([Soil].SoilWater.SWmm) as SoilTotalWater
          [Soil].SoilWater.Drainage
          [Soil].SoilWater.Es
          [Soil].SoilWater.Runoff
          [Irrigation].IrrigationApplied
          [SCRUM].Stover.WaterDemand
          [SCRUM].Stover.Transpiration
          [SCRUM].Root.WaterUptake
          [AutomaticIrrigation].Script.AmountToApply
          [AutomaticIrrigation].Script.MonitoredLayerLL
          [AutomaticIrrigation].Script.MonitoredLayerDUL
          [AutomaticIrrigation].Script.MonitoredLayerSW
          [AutomaticIrrigation].Script.MonitoredLayerTarget
          [AutomaticIrrigation].Script.MonitoredLayerTrigger
          // Nitrogen balance
          sum([Soil].Nutrient.MineralN) as TotalSoilNitrogen
          [Fertiliser].NitrogenApplied
          [Soil].SoilWater.LeachNO3
          [Soil].Nutrient.DenitrifiedN
          [SCRUM].Root.NUptake
          [AutomaticFertiliser].Script.MonitoredLayerSoilN
          [AutomaticFertiliser].Script.AmountToApply
      ScrumCropInstance ScrumCereal: HarvestIndex=0.45; MoistureContent=0.14; RootProportion=0.1; MaxRootDepth=1005; MaxHeight=700; MaxCover=0.97; ExtinctionCoefficient=0.55; TypicalHarvestStage=Ripe; SeedlingNConc=0.05; ProductHarvestNConc=0.015; StoverHarvestNConc=0.01; RootNConc=0.01; OptimumTemperature=30; MaxTemperature=40; Tt_SowToEmergence=100; GSMax=0.008; R50=150; ConsiderWaterStress=true; Factor_XoBiomass=0.5; Factor_bBiomass=0.2; Factor_XoCover=0.4; Factor_bCover=0.2; Factor_XoHeight=0.7; Factor_bHeight=0.2
        zero: LegumeFactor, BaseTemperature, PlantingDepth, ExpectedYield, Tt_EstablishmentToHarvest, FieldLoss, ResidueRemoval, ResidueIncorporation, ResidueIncorporationDepth, Tt_EmergenceToMaturity
  Simulation SCRUMRepeatPlantingFromManager
    Memo Description
      This example specifies a SCRUMCropInstance and sows it on the same date each year.   The necessary components in the Field are:
      * the SCRUM model
      * A SCRUMCropInstance, named SCRUMCereal in this case but the name can be anything
      * A manager model called "Sow Cereal same date each year" that sets the management information for SCRUMCereal and establishs it on the same date each year.
    Weather: FileName=%root%/Examples/WeatherFiles/NZ_Lincoln.met
    Clock: Start=1998-10-14; End=2006-03-01
    Summary
    SoilArbitrator Soil Arbitrator
    Zone Field: Area=1; Slope=0; AspectAngle=0; Altitude=50
      Soil: same as SCRUMSinglePlantingFromManager.Field.Soil
      SurfaceOrganicMatter: InitialResidueName=wheat; InitialResidueType=wheat; InitialResidueMass=2000; InitialStandingFraction=0; InitialCPR=0; InitialCNR=80
      MicroClimate: a_interception=0; b_interception=1; c_interception=0; d_interception=0; SoilHeatFluxFraction=0.4; MinimumHeightDiffForNewLayer=0; NightInterceptionFraction=0.5; ReferenceHeight=2
      Manager Sow Cereal Multiple dates
        CropName = ScrumCereal
        EstablishDates = 15-sep-1999, 1-10-2001, 15/08/2003
        EstablishStage = Seed
        PlantingDepth = 15
        HarvestTimeOption = SettingThermalTime
        HarvestDate = 01/01/0001 00:00:00
        Tt_EstablishToHarvest = 1000
        HarvestStage = Maturity
        ExpectedYield = 8
        FieldLoss = 0
        ResidueRemoval = 0
        ResidueIncorporation = 1
        ResidueIncorporationDepth = 100
        script: same as in SCRUMSinglePlantingFromManager.Field.EstablishCrop
      Plant SCRUM
      Irrigation
      Fertiliser
      Manager AutomaticIrrigation: same as SCRUMSinglePlantingFromManager.Field.AutomaticIrrigation
      Manager AutomaticFertiliser
        FertiliserIsEnabled = True
        SeasonStartDate = 1-Aug
        SeasonEndDate = 30-Apr
        OnlyApplyOntoCrop = False
        SeasonsAllocation = 1000
        TriggerSoilN = 75
        AmountToApply = 25
        FertiliserType = UreaN
        ReturnDays = 3
        DepthToMonitor = 300
        LimitMonitoringDepth = False
        script: same as in SCRUMSinglePlantingFromManager.Field.AutomaticFertiliser
      Report: same as SCRUMSinglePlantingFromManager.Field.Report
      ScrumCropInstance ScrumCereal: HarvestIndex=0.45; MoistureContent=0.14; RootProportion=0.1; MaxRootDepth=1005; MaxHeight=700; MaxCover=0.97; ExtinctionCoefficient=0.55; TypicalHarvestStage=Ripe; SeedlingNConc=0.05; ProductHarvestNConc=0.015; StoverHarvestNConc=0.01; RootNConc=0.01; OptimumTemperature=30; MaxTemperature=40; Tt_SowToEmergence=100; GSMax=0.008; R50=150; ConsiderWaterStress=true; Factor_XoBiomass=0.5; Factor_bBiomass=0.2; Factor_XoCover=0.4; Factor_bCover=0.2; Factor_XoHeight=0.7; Factor_bHeight=0.2
        zero: LegumeFactor, BaseTemperature, PlantingDepth, ExpectedYield, Tt_EstablishmentToHarvest, FieldLoss, ResidueRemoval, ResidueIncorporation, ResidueIncorporationDepth, Tt_EmergenceToMaturity
  Simulation SCRUMRotationFromManager
    Memo Description
      This example specifies a simple rotation of two seperate crops simulated using SCRUM.  The necessary components in the Field are:
      * the SCRUM model
      * A SCRUMCropInstance (SCRUMCereal) that parameterises the first crop and a manager script ("Sow Cereal on Oct2000 harvest apr2001") that sets the management informaiton for this crop and establishes it on the appropriate date.
      * A SCRUMCropInstance (SCRUMLegume) that parameterises the second crop and a manager script ("Sow legume Jun2001 harvest after 600 oCd") that sets the management informaiton for this crop and establishes it on the appropriate date.
    Weather: FileName=%root%/Examples/WeatherFiles/NZ_Lincoln.met
    Clock: Start=2000-07-01; End=2002-01-01
    Summary
    SoilArbitrator Soil Arbitrator
    Zone Field: Area=1; Slope=0; AspectAngle=0; Altitude=50
      Soil: Latitude=0; Longitude=0
        Chemical: same as SCRUMSinglePlantingFromManager.Field.Soil.Chemical
        Water: Thickness=[100, 200, 300, 300, 300, 300]; InitialValues=[0.33, 0.33, 0.31, 0.15, 0.1, 0.06]; InitialPAWmm=180; RelativeTo=LL15; FilledFromTop=false
        Physical: same as SCRUMSinglePlantingFromManager.Field.Soil.Physical
        WaterBalance SoilWater: same as SCRUMSinglePlantingFromManager.Field.Soil.SoilWater
        Nutrient
        Organic: same as SCRUMSinglePlantingFromManager.Field.Soil.Organic
        LayerStructure
          Thickness=[100, 100, 100, 100, 100, 100, 100, 100, 100, 100, 100, 100, 100, 100, 100]
        Solute NO3: Thickness=[100, 200, 300, 300, 300, 300]; InitialValues=[225, 12.5, 1.389, 1.389, 0, 0]; InitialValuesUnits=ppm; WaterTableConcentration=0; D0=0; DepthConstant=0; MaxDepthSoluteAccessible=0; RunoffEffectivenessAtMovingSolute=0; MaxEffectiveRunoff=0
        Solute NH4: same as SCRUMSinglePlantingFromManager.Field.Soil.NH4
        Solute Urea: same as SCRUMSinglePlantingFromManager.Field.Soil.Urea
        SoilTemperature Temperature
      SurfaceOrganicMatter: InitialResidueName=wheat; InitialResidueType=wheat; InitialResidueMass=2000; InitialStandingFraction=0; InitialCPR=0; InitialCNR=80
      MicroClimate: a_interception=0; b_interception=1; c_interception=0; d_interception=0; SoilHeatFluxFraction=0.4; MinimumHeightDiffForNewLayer=0; NightInterceptionFraction=0.5; ReferenceHeight=2
      Plant SCRUM
      Manager Sow Cereal on Oct2000 harvest apr2001
        CropName = ScrumCereal
        EstablishDate = 14/10/2000
        EstablishStage = Seed
        PlantingDepth = 15
        HarvestTimeOption = SettingDate
        HarvestDate = 04/14/2001 00:00:00
        Tt_EstablishToHarvest = 1000
        HarvestStage = Maturity
        ExpectedYield = 8
        FieldLoss = 0
        ResidueRemoval = 0
        ResidueIncorporation = 1
        ResidueIncorporationDepth = 150
```csharp
using System;
using System.Linq;
using APSIM.Shared.Utilities;
using Models.Core;
using Models.Soils;
using Models.PMF;
using Models.PMF.SimplePlantModels;
using Models.Utilities;

namespace Models
{
    [Serializable]
    public class Script : Model
    {
        [Link] Clock clock;
        [Link] Zone zone;
        [Link(Type = LinkType.Scoped, ByName = true)]
        public Plant scrum = null;

        [Separator("Define the SCRUM crop to plant and its basic management")]

        /// <summary>SCRUM crop to stablish</summary>
        [Description("Chose the crop to plant:")]
        [Display(Type = DisplayType.SCRUMcropName)]
        public string CropName { get; set; }

        [Separator("Specify establishment and harvest conditions for this crop")]

        /// <summary>Date to establishment the crop</summary>
        [Description("Establishment date (dd-mmm or dd/mm/yyyy):")]
        public string EstablishDate { get; set; }

        /// <summary>Stages at which the SCRUM is established</summary>
        [Description("Choose the establishment stage")]
        [Display(Type = DisplayType.ScrumEstablishStages)]
        public string EstablishStage {get; set;}

        /// <summary>Depth at which the crop/seeds are planted.</summary>
        [Description(" Planting depth (mm):")]
        public double PlantingDepth { get; set; }

        /// <summary>Choice on how the duration of crop is defined</summary>
        [Description("Choose how the crop cycle is defined:")]
        public HarvestTimingOption HarvestTimeOption {get; set;}

        private bool isHarvestDateDefined { get { return HarvestTimeOption == HarvestTimingOption.SettingDate; } }
        private bool isThermalTimeDefined { get { return HarvestTimeOption == HarvestTimingOption.SettingThermalTime; } }

        /// <summary>Date to establishment the crop</summary>
        [Description("  Harvest date (dd/mm/yyyy):")]
        [Display(VisibleCallback = "isHarvestDateDefined")]
        public DateTime HarvestDate { get; set; }

        /// <summary>Thermal time from establishment to harvest (if blank or zero must specify harvest date)</summary>
        [Description("  Thermal time from establishment to harvest (oCd):")]
        [Display(VisibleCallback = "isThermalTimeDefined")]
        public double Tt_EstablishToHarvest { get; set; }

        /// <summary>Stage at which the crop is to be harvested at</summary>
        [Description("Choose the stage to harvest the crop:")]
        [Display(Type = DisplayType.ScrumHarvestStages)]
        public string HarvestStage {get; set;}

        [Separator("Specify an appropriate potential yield for the crop (based on assumed genotype, sowing date, and local conditions)\n" +
                   "  *SCRUM will reduce yield if water or N stress are predicted")]

        /// <summary>Expected crop yield (t FW/ha)</summary>
        [Description("Potential crop yield, fresh weight (t/ha)")]
        public double ExpectedYield {get; set;}

        [Separator("Specify proportions of field loss and residue removal at harvest")]

        /// <summary>Proportion of product that is left in the field at harvest (due to disease, market, ect.)</summary>
        [Description("Proportion of product lost in the field at harvest (0-1):")]
        public double FieldLoss { get; set; }

        /// <summary>Proportion of stover that is removed from the field at harvest (e.g., bailing)</summary>
        [Description("Proportion of stover removed from the field at harvest (0-1):")]
        public double ResidueRemoval { get; set; }

        /// <summary>Proportion of residues that is incorporated by cultivation after harvest</summary>
        [Description("Proportion of residue incorporated to soil at harvest (0-1):")]
        public double ResidueIncorporation { get; set; }

        /// <summary>Depth down to which the residues that are incorporated to by cultivation after harvest</summary>
        [Description("Depth to incorporate residues (mm):")]
        public double ResidueIncorporationDepth { get; set; }

        private ScrumManagementInstance management;


        [EventSubscribe("DoManagement")]
        private void OnDoManagement(object sender, EventArgs e)
        {
            if (DateUtilities.DatesAreEqual(EstablishDate, clock.Today))
            {
                if (isHarvestDateDefined && (HarvestDate <= clock.Today))
                {
                    throw new Exception("Harvest date is earlier than establishment date");
                }

                management = new ScrumManagementInstance(cropName: CropName,
                                                         establishDate: clock.Today,
                                                         establishStage: EstablishStage,
                                                         plantingDepth: PlantingDepth,
                                                         harvestStage: HarvestStage,
                                                         expectedYield: ExpectedYield,
                                                         harvestDate: isHarvestDateDefined? HarvestDate : null,
                                                         ttEstablishmentToHarvest: isThermalTimeDefined? Tt_EstablishToHarvest: double.NaN,
                                                         fieldLoss: FieldLoss,
                                                         residueRemoval: ResidueRemoval,
                                                         residueIncorporation: ResidueIncorporation,
                                                         residueIncorporationDepth: ResidueIncorporationDepth);
                ScrumCropInstance currentCrop = zone.FindDescendant<ScrumCropInstance>(CropName);
                currentCrop.Establish(management);
            }
        }

        /// <summary>Flag how harvest time is defined.</summary>
        public enum HarvestTimingOption
        {
            /// <summary>A date is to be used.</summary>
            SettingDate,
            /// <summary>A given thermal time sum is to be used.</summary>
            SettingThermalTime
        }
    }
}
```
      Manager Sow legume Jun2001 harvest after 600 oCd
        CropName = ScrumLegume
        EstablishDate = 01/06/2001
        EstablishStage = Seed
        PlantingDepth = 15
        HarvestTimeOption = SettingThermalTime
        HarvestDate = 01/01/0001 00:00:00
        Tt_EstablishToHarvest = 600
        HarvestStage = LateReproductive
        ExpectedYield = 3
        FieldLoss = 0.1
        ResidueRemoval = 0.6
        ResidueIncorporation = 0.5
        ResidueIncorporationDepth = 50
        script: same as in SCRUMRotationFromManager.Field.Sow Cereal on Oct2000 harvest apr2001
      Irrigation
      Fertiliser
      Manager AutomaticIrrigation: same as SCRUMSinglePlantingFromManager.Field.AutomaticIrrigation
      Manager AutomaticFertiliser: same as SCRUMSinglePlantingFromManager.Field.AutomaticFertiliser
      Report: same as SCRUMSinglePlantingFromManager.Field.Report
      ScrumCropInstance ScrumLegume: HarvestIndex=0.45; MoistureContent=0.14; RootProportion=0.1; MaxRootDepth=1005; MaxHeight=700; MaxCover=0.9; ExtinctionCoefficient=0.55; TypicalHarvestStage=Ripe; SeedlingNConc=0.05; ProductHarvestNConc=0.015; StoverHarvestNConc=0.01; RootNConc=0.01; LegumeFactor=1; OptimumTemperature=30; MaxTemperature=40; Tt_SowToEmergence=200; GSMax=0.008; R50=150; ConsiderWaterStress=true; Factor_XoBiomass=0.5; Factor_bBiomass=0.2; Factor_XoCover=0.4; Factor_bCover=0.2; Factor_XoHeight=0.7; Factor_bHeight=0.2
        zero: BaseTemperature, PlantingDepth, ExpectedYield, Tt_EstablishmentToHarvest, FieldLoss, ResidueRemoval, ResidueIncorporation, ResidueIncorporationDepth, Tt_EmergenceToMaturity
      ScrumCropInstance ScrumCereal: same as SCRUMRepeatPlantingFromManager.Field.ScrumCereal
  Simulation SCRUMRotationComponent
    Memo Description
      This example specifies a more detailed rotation is simulated using SCRUM.  The necessary components in the Field are:
      * the SCRUM model
      * A set of scrum SCRUMCropInstances to represent each of the crops in the rotation (Potato, Wheat, OatForage, Carrot and TrunipForrage)
      * A SCRUMRotation Model that sets the management for each of the crops in the rotation.  To facilitate the process of setting up a rotation this component uses a grid input with a column for each crop (The header Name must match the SCRUMCropInstance Name) and a row for each of the parameters required to define the managment for each crop.  Note that the grid reads and writes to a .csv file and rotation parameters may be changed through the userinterface view or by editing and saving the .csv file.
    Clock: End=1969-09-21
    Weather: FileName=%root%/Examples/WeatherFiles/NZ_Lincoln.met
    Summary
    SoilArbitrator Soil Arbitrator
    Manager TreatmentID
```csharp
using Models.Soils;
using System.Data;
using System.IO;
using APSIM.Shared.Utilities;
using System.Xml.Serialization;
using Models;
using Models.PMF;
using System.Text;
using System.Collections.Generic;
using Models.Core;
using System;
using Newtonsoft.Json;
      

namespace Models
{
    [Serializable] 
    public class Script : Model
    {
        [JsonIgnore] public string Rotation { get; set; }
        [JsonIgnore] public string Irrigation { get; set; }
        [JsonIgnore] public string Nitrogen { get; set; }
        
        [JsonIgnore] public string TreatmentName { get; set; }
        
        [EventSubscribe("StartOfSimulation")]
        private void OnStartOfSimulation(object sender, EventArgs e)
        {
            TreatmentName = Rotation + "_" + Irrigation + "_" + Nitrogen;
        }
    }
}
```
    Zone Field: Area=1; Slope=0; AspectAngle=0; Altitude=50
      Soil: Region=Plains; State=Canterbury; Country=New Zealand; Latitude=0; Longitude=0
        DataSource=Generic profile descriptions provided by Trevor Webb and data for functional horizions based on SWAMP project results
        Comments=Bulk density values were measured on the fine earth fraction so values entered into apsim soil are adjusted down to account for stone content (assuming stones are inert from all soil process so their mass and volume is removed from model paramaters).  SAT, DUL, LL15 and Air dry have been adjusted down to account for stone content.  OC has not been adjusted so the model will get the correct carbon and N amounts using the adjusted BD.
        Chemical: PHUnits=Water
          Thickness  PH  CEC
          100        6   14.36825
          200        6   14.609
          200        6   11.6165
          100        6   9.20675
          300        6   8.89175
          200        6   8.89175
          100        6   8.89175
          300        6   8.89175
          CEC source: Calculated
        Physical
          Thickness  ParticleSizeSand  ParticleSizeSilt  ParticleSizeClay  Rocks     BD     AirDry  LL15   DUL   SAT
          100        5                 65                30                0.276409  1      0.05    0.1    0.27  0.419
          200        5                 65                30                0.317856  1      0.05    0.1    0.27  0.395
          300        5                 65                30                0         1.59   0.157   0.157  0.29  0.36
          200        5                 65                30                0         1.57   0.173   0.173  0.3   0.366
          100        5                 65                30                0         1.57   0.173   0.173  0.3   0.366
          200        5                 65                30                0         1.6    0.165   0.165  0.3   0.358
          100        5                 65                30                0         1.6    0.165   0.165  0.3   0.358
          300        5                 65                30                0.14163   1.601  0.115   0.115  0.3   0.316
          Rocks, ParticleSizeSand, ParticleSizeSilt, ParticleSizeClay source: Calculated
          SoilCrop SCRUMSoil: LL=[0.1, 0.1, 0.157, 0.173, 0.173, 0.165, 0.165, 0.115]; KL=[0.1, 0.1, 0.1, 0.1, 0.1, 0.1, 0.1, 0.1]; XF=[1, 1, 1, 1, 1, 1, 1, 1]
        WaterBalance SoilWater: SummerDate=1-oct; SummerU=9; SummerCona=4.4; WinterDate=1-Apr; WinterU=2; WinterCona=1.5; DiffusConst=88; DiffusSlope=35; Salb=0.13; CN2Bare=73; CNRed=20; CNCov=0.8; PSIDul=-100; Thickness=[100, 200, 300, 200, 100, 200, 100, 300]; SWCON=[0.9, 0.6, 0.4, 0.4, 0.4, 0.9, 0.9, 0.9]
        Nutrient
        Organic: FOMCNRatio=31.5; CarbonUnits=Total
          Thickness  Carbon  SoilCNRatio  FBiom  FInert  FOM
          100        2.677   11           0.025  0.45    536.934
          200        2.784   11           0.025  0.6     359.917
          300        1.454   11           0.015  0.75    197.527
          200        0.383   11           0.01   0.9     132.406
          100        0.243   11           0.01   0.96    108.405
          200        0.243   11           0.01   0.96    72.6661
          100        0.243   11           0.01   0.96    59.4939
          300        0.243   11           0.01   0.96    32.651
        Water: Thickness=[100, 200, 300, 200, 100, 200, 100, 300]; InitialValues=[0.27, 0.27, 0.29, 0.3, 0.3, 0.3, 0.3, 0.225]; InitialPAWmm=202.5; RelativeTo=LL15; FilledFromTop=true
        Solute NO3: Thickness=[100, 200, 200, 100, 300, 200, 100, 300]; InitialValuesUnits=ppm; WaterTableConcentration=0; D0=0; DepthConstant=0; MaxDepthSoluteAccessible=0; RunoffEffectivenessAtMovingSolute=0; MaxEffectiveRunoff=0
          InitialValues=[35, 15, 6.07966, 6.07966, 0.849257, 0.3125, 0.625, 0.208203]
        Solute NH4: Thickness=[100, 200, 200, 100, 300, 200, 100, 300]; InitialValuesUnits=ppm; WaterTableConcentration=0; D0=0; DepthConstant=0; MaxDepthSoluteAccessible=0; RunoffEffectivenessAtMovingSolute=0; MaxEffectiveRunoff=0
          InitialValues=[6.18, 3.09, 0.672956, 0.672956, 0.552017, 0.28125, 0.0625, 0.0208203]
        Solute Urea: Thickness=[100, 200, 200, 100, 300, 200, 100, 300]; InitialValues=[0, 0, 0, 0, 0, 0, 0, 0]; InitialValuesUnits=kg/ha; WaterTableConcentration=0; D0=0; DepthConstant=0; MaxDepthSoluteAccessible=0; RunoffEffectivenessAtMovingSolute=0; MaxEffectiveRunoff=0
        SoilTemperature Temperature
      SurfaceOrganicMatter: InitialResidueName=grass; InitialResidueType=grass; InitialResidueMass=2500; InitialStandingFraction=0; InitialCPR=0; InitialCNR=15
      MicroClimate: a_interception=0; b_interception=1; c_interception=0; d_interception=0; SoilHeatFluxFraction=0.4; MinimumHeightDiffForNewLayer=0; NightInterceptionFraction=0.5; ReferenceHeight=2
      Irrigation
      Fertiliser
      Plant SCRUM
      ScrumCropInstance Potato: HarvestIndex=0.9; MoistureContent=0.78; RootProportion=0.1; MaxRootDepth=600; MaxHeight=100; MaxCover=0.95; ExtinctionCoefficient=0.55; TypicalHarvestStage=LateReproductive; SeedlingNConc=0.04; ProductHarvestNConc=0.012; StoverHarvestNConc=0.009; RootNConc=0.01; BaseTemperature=5; OptimumTemperature=30; MaxTemperature=40; Tt_SowToEmergence=300; GSMax=0.008; R50=150; ConsiderWaterStress=true; Factor_XoBiomass=0.5; Factor_bBiomass=0.2; Factor_XoCover=0.4; Factor_bCover=0.2; Factor_XoHeight=0.7; Factor_bHeight=0.2
        zero: LegumeFactor, PlantingDepth, ExpectedYield, Tt_EstablishmentToHarvest, FieldLoss, ResidueRemoval, ResidueIncorporation, ResidueIncorporationDepth, Tt_EmergenceToMaturity
      ScrumCropInstance Wheat: HarvestIndex=0.5; MoistureContent=0.14; RootProportion=0.1; MaxRootDepth=2000; MaxHeight=1800; MaxCover=0.97; ExtinctionCoefficient=0.55; TypicalHarvestStage=Ripe; SeedlingNConc=0.03; ProductHarvestNConc=0.012; StoverHarvestNConc=0.009; RootNConc=0.01; OptimumTemperature=30; MaxTemperature=40; Tt_SowToEmergence=100; GSMax=0.008; R50=150; ConsiderWaterStress=true; Factor_XoBiomass=0.5; Factor_bBiomass=0.2; Factor_XoCover=0.4; Factor_bCover=0.2; Factor_XoHeight=0.7; Factor_bHeight=0.2
        zero: LegumeFactor, BaseTemperature, PlantingDepth, ExpectedYield, Tt_EstablishmentToHarvest, FieldLoss, ResidueRemoval, ResidueIncorporation, ResidueIncorporationDepth, Tt_EmergenceToMaturity
      ScrumCropInstance OatForage: HarvestIndex=0.95; RootProportion=0.1; MaxRootDepth=1000; MaxHeight=700; MaxCover=0.97; ExtinctionCoefficient=0.8; TypicalHarvestStage=EarlyReproductive; SeedlingNConc=0.05; ProductHarvestNConc=0.03; StoverHarvestNConc=0.02; RootNConc=0.01; BaseTemperature=5; OptimumTemperature=30; MaxTemperature=40; Tt_SowToEmergence=100; GSMax=0.008; R50=150; ConsiderWaterStress=true; Factor_XoBiomass=0.5; Factor_bBiomass=0.2; Factor_XoCover=0.4; Factor_bCover=0.2; Factor_XoHeight=0.7; Factor_bHeight=0.2
        zero: MoistureContent, LegumeFactor, PlantingDepth, ExpectedYield, Tt_EstablishmentToHarvest, FieldLoss, ResidueRemoval, ResidueIncorporation, ResidueIncorporationDepth, Tt_EmergenceToMaturity
      ScrumCropInstance Carrot: HarvestIndex=0.7; MoistureContent=0.88; RootProportion=0.1; MaxRootDepth=1000; MaxHeight=400; MaxCover=0.9; ExtinctionCoefficient=0.7; TypicalHarvestStage=LateReproductive; SeedlingNConc=0.03; ProductHarvestNConc=0.012; StoverHarvestNConc=0.009; RootNConc=0.01; BaseTemperature=3; OptimumTemperature=30; MaxTemperature=40; Tt_SowToEmergence=300; GSMax=0.008; R50=150; ConsiderWaterStress=true; Factor_XoBiomass=0.5; Factor_bBiomass=0.2; Factor_XoCover=0.4; Factor_bCover=0.2; Factor_XoHeight=0.7; Factor_bHeight=0.2
        zero: LegumeFactor, PlantingDepth, ExpectedYield, Tt_EstablishmentToHarvest, FieldLoss, ResidueRemoval, ResidueIncorporation, ResidueIncorporationDepth, Tt_EmergenceToMaturity
      ScrumCropInstance TurnipForage: HarvestIndex=0.8; RootProportion=0.1; MaxRootDepth=1000; MaxHeight=400; MaxCover=0.95; ExtinctionCoefficient=0.85; TypicalHarvestStage=Vegetative; SeedlingNConc=0.03; ProductHarvestNConc=0.012; StoverHarvestNConc=0.009; RootNConc=0.01; BaseTemperature=3; OptimumTemperature=30; MaxTemperature=40; Tt_SowToEmergence=200; GSMax=0.008; R50=150; ConsiderWaterStress=true; Factor_XoBiomass=0.5; Factor_bBiomass=0.2; Factor_XoCover=0.4; Factor_bCover=0.2; Factor_XoHeight=0.7; Factor_bHeight=0.2
        zero: MoistureContent, LegumeFactor, PlantingDepth, ExpectedYield, Tt_EstablishmentToHarvest, FieldLoss, ResidueRemoval, ResidueIncorporation, ResidueIncorporationDepth, Tt_EmergenceToMaturity
      Report: same as SCRUMSinglePlantingFromManager.Field.Report
      ScrumRotation: CoefficientFile=Rotation1.csv
      Manager AutomaticIrrigation
        IrrigationIsEnabled = True
        SeasonStartDate = 1-Sep
        SeasonEndDate = 30-Apr
        OnlyApplyOntoCrop = True
        SeasonsAllocation = 2000
        TriggerFraction = 0.6
        RefillFraction = 0.9
        MaximumIrrigationAmount = 100
        ReturnDays = 2
        DepthToMonitor = 600
        LimitMonitoringDepth = True
        script: same as in SCRUMSinglePlantingFromManager.Field.AutomaticIrrigation
      Manager AutomaticFertiliser: same as SCRUMRepeatPlantingFromManager.Field.AutomaticFertiliser
  Folder Detailed Examples
    Experiment EstablishAndHarvestAtDifferentStages
      Memo
        This example shows how SCRUM crop instances can be established and harvested at different stages to give different development patterns
      Factors
        Permutation
          Factor EstabAt
            Specification=[CropManagement].Script.EstablishStage = Seed, Emergence, Seedling
          Factor HarvAt
            Specification=[CropManagement].Script.HarvestStage = Vegetative, EarlyReproductive, MidReproductive, LateReproductive, Maturity, Ripe
      Simulation EstabAndHarv
        Weather: FileName=%root%/Examples/WeatherFiles/NZ_Lincoln.met
        Clock: Start=1998-10-14; End=1999-07-01
        Summary
        SoilArbitrator Soil Arbitrator
        Zone Field: Area=1; Slope=0; AspectAngle=0; Altitude=50
          Soil: Latitude=0; Longitude=0
            Chemical: same as SCRUMSinglePlantingFromManager.Field.Soil.Chemical
            Water: Thickness=[100, 200, 300, 300, 300, 300]; InitialValues=[0.33, 0.33, 0.31, 0.15, 0.1, 0.06]; InitialPAWmm=180; RelativeTo=LL15; FilledFromTop=false
            Physical
              Thickness  ParticleSizeSand  ParticleSizeSilt  ParticleSizeClay  Rocks     BD   AirDry  LL15  DUL   SAT
              100        5                 65                30                0         1.2  0.08    0.13  0.33  0.5
              200        5                 65                30                0         1.2  0.13    0.13  0.33  0.5
              300        5                 65                30                0.135336  1.2  0.1     0.1   0.31  0.44
              300        5                 65                30                0         1.2  0.06    0.06  0.31  0.46
              300        5                 65                30                0.135336  1.2  0.04    0.04  0.31  0.44
              300        5                 65                30                0.135336  1.2  0.02    0.02  0.31  0.44
              Rocks, ParticleSizeSand, ParticleSizeSilt, ParticleSizeClay source: Calculated
              SoilCrop SCRUMSoil: LL=[0.13, 0.13, 0.1, 0.08, 0.11, 0.11]; KL=[0.1, 0.1, 0.1, 0.1, 0.1, 0.1]; XF=[1, 1, 1, 1, 1, 1]
              SoilCrop PotatoSoil: LL=[0.13, 0.13, 0.27, 0.27, 0.3, 0.3]; KL=[0.1, 0.06, 0.03, 0.01, 0, 0]; XF=[1, 1, 0.1, 0, 0, 0]
            WaterBalance SoilWater: same as SCRUMSinglePlantingFromManager.Field.Soil.SoilWater
            Nutrient
            Organic: same as SCRUMSinglePlantingFromManager.Field.Soil.Organic
            LayerStructure
              Thickness=[100, 100, 100, 100, 100, 100, 100, 100, 100, 100, 100, 100, 100, 100, 100]
            Solute NO3: Thickness=[100, 200, 300, 300, 300, 300]; InitialValues=[1225, 12.5, 1.389, 1.389, 0, 0]; InitialValuesUnits=ppm; WaterTableConcentration=0; D0=0; DepthConstant=0; MaxDepthSoluteAccessible=0; RunoffEffectivenessAtMovingSolute=0; MaxEffectiveRunoff=0
            Solute NH4: same as SCRUMSinglePlantingFromManager.Field.Soil.NH4
            Solute Urea: same as SCRUMSinglePlantingFromManager.Field.Soil.Urea
            SoilTemperature Temperature
          SurfaceOrganicMatter: InitialResidueName=wheat; InitialResidueType=wheat; InitialResidueMass=2000; InitialStandingFraction=0; InitialCPR=0; InitialCNR=80
          MicroClimate: a_interception=0; b_interception=1; c_interception=0; d_interception=0; SoilHeatFluxFraction=0.4; MinimumHeightDiffForNewLayer=0; NightInterceptionFraction=0.5; ReferenceHeight=2
          Plant SCRUM
          Irrigation
          Fertiliser
          Manager CropManagement
            CropName = SCRUM_Wheat
            EstablishDate = 14/10/1998
            EstablishStage = Seedling
            PlantingDepth = 20
            HarvestTimeOption = SettingThermalTime
            HarvestDate = 01/04/1999
            Tt_EstablishToHarvest = 1000
            HarvestStage = Maturity
            ExpectedYield = 10
            FieldLoss = 0
            ResidueRemoval = 0
            ResidueIncorporation = 0
            ResidueIncorporationDepth = 0
```csharp
using System;
using System.Linq;
using APSIM.Shared.Utilities;
using Models.Core;
using Models.Soils;
using Models.PMF;
using Models.PMF.SimplePlantModels;
using Models.Utilities;

namespace Models
{
    [Serializable]
    public class Script : Model
    {
        [Link] Clock clock;
        [Link] Zone zone;
        [Link(Type = LinkType.Scoped, ByName = true)]
        public Plant scrum = null;

        [Separator("Define the SCRUM crop to plant and its basic management")]

        /// <summary>SCRUM crop to stablish</summary>
        [Description("Chose the crop to plant:")]
        [Display(Type = DisplayType.SCRUMcropName)]
        public string CropName { get; set; }

        [Separator("Specify establishment and harvest conditions for this crop")]

        /// <summary>Date to establishment the crop</summary>
        [Description("Establishment date (dd-mmm or dd/mm/yyyy):")]
        public string EstablishDate { get; set; }

        /// <summary>Stages at which the SCRUM is established</summary>
        [Description("Choose the establishment stage")]
        [Display(Type = DisplayType.ScrumEstablishStages)]
        public string EstablishStage {get; set;}

        /// <summary>Depth at which the crop/seeds are planted.</summary>
        [Description(" Planting depth (mm):")]
        public double PlantingDepth { get; set; }

        /// <summary>Choice on how the duration of crop is defined</summary>
        [Description("Choose how the crop cycle is defined:")]
        public HarvestTimingOption HarvestTimeOption {get; set;}

        private bool isHarvestDateDefined { get { return HarvestTimeOption == HarvestTimingOption.SettingDate; } }
        private bool isThermalTimeDefined { get { return HarvestTimeOption == HarvestTimingOption.SettingThermalTime; } }

        /// <summary>Date to establishment the crop</summary>
        [Description("  Harvest date (dd-mmm or dd/mm/yyyy):")]
        [Display(VisibleCallback = "isHarvestDateDefined")]
        public string HarvestDate { get; set; }

        /// <summary>Thermal time from establishment to harvest (if blank or zero must specify harvest date)</summary>
        [Description("  Thermal time from establishment to harvest (oCd):")]
        [Display(VisibleCallback = "isThermalTimeDefined")]
        public double Tt_EstablishToHarvest { get; set; }

        /// <summary>Stage at which the crop is to be harvested at</summary>
        [Description("Choose the stage to harvest the crop:")]
        [Display(Type = DisplayType.ScrumHarvestStages)]
        public string HarvestStage {get; set;}

        [Separator("Specify an appropriate potential yield for the crop (based on assumed genotype, sowing date, and local conditions)\n" +
                   "  *SCRUM will reduce yield if water or N stress are predicted")]

        /// <summary>Expected crop yield (t FW/ha)</summary>
        [Description("Potential crop yield, fresh weight (t/ha)")]
        public double ExpectedYield {get; set;}

        [Separator("Specify proportions of field loss and residue removal at harvest")]

        /// <summary>Proportion of product that is left in the field at harvest (due to disease, market, ect.)</summary>
        [Description("Proportion of product lost in the field at harvest (0-1):")]
        public double FieldLoss { get; set; }

        /// <summary>Proportion of stover that is removed from the field at harvest (e.g., bailing)</summary>
        [Description("Proportion of stover removed from the field at harvest (0-1):")]
        public double ResidueRemoval { get; set; }

        /// <summary>Proportion of residues that is incorporated by cultivation after harvest</summary>
        [Description("Proportion of residue incorporated to soil at harvest (0-1):")]
        public double ResidueIncorporation { get; set; }

        /// <summary>Depth down to which the residues that are incorporated to by cultivation after harvest</summary>
        [Description("Depth to incorporate residues (mm):")]
        public double ResidueIncorporationDepth { get; set; }

        private ScrumManagementInstance management;
        private DateTime dateToHarvest;


        [EventSubscribe("DoManagement")]
        private void OnDoManagement(object sender, EventArgs e)
        {
            if (DateUtilities.DatesAreEqual(EstablishDate, clock.Today))
            {
                // check harvest date
                if (isHarvestDateDefined)
                {
                    dateToHarvest = DateUtilities.GetDate(HarvestDate, clock.Today.Year);
                    if (dateToHarvest <= clock.Today)
                    {
                        if (DateUtilities.ValidateStringHasYear(HarvestDate))
                        { // year was given, but not a good one
                            throw new Exception("Harvest date is earlier than establishment date");
                        }
                        else
                        { // year was not given, ensure end date is after sowing date
                            dateToHarvest = dateToHarvest.AddYears(1 + clock.Today.Year - dateToHarvest.Year);
                        }
                    }
                }

                management = new ScrumManagementInstance(cropName: CropName,
                                                         establishDate: clock.Today,
                                                         establishStage: EstablishStage,
                                                         plantingDepth: PlantingDepth,
                                                         harvestStage: HarvestStage,
                                                         expectedYield: ExpectedYield,
                                                         harvestDate: isHarvestDateDefined? dateToHarvest : null,
                                                         ttEstablishmentToHarvest: isThermalTimeDefined? Tt_EstablishToHarvest: double.NaN,
                                                         fieldLoss: FieldLoss,
                                                         residueRemoval: ResidueRemoval,
                                                         residueIncorporation: ResidueIncorporation,
                                                         residueIncorporationDepth: ResidueIncorporationDepth);
                ScrumCropInstance currentCrop = zone.FindDescendant<ScrumCropInstance>(CropName);
                currentCrop.Establish(management);
            }
        }

        /// <summary>Flag how harvest time is defined.</summary>
        public enum HarvestTimingOption
        {
            /// <summary>A date is to be used.</summary>
            SettingDate,
            /// <summary>A given thermal time sum is to be used.</summary>
            SettingThermalTime
        }
    }
}
```
          Manager AutomaticIrrigation: same as SCRUMSinglePlantingFromManager.Field.AutomaticIrrigation
          Manager AutomaticFertiliser
            FertiliserIsEnabled = True
            SeasonStartDate = 1-Aug
            SeasonEndDate = 30-Apr
            OnlyApplyOntoCrop = False
            SeasonsAllocation = 1000
            TriggerSoilN = 100
            AmountToApply = 100
            FertiliserType = UreaN
            ReturnDays = 3
            DepthToMonitor = 300
            LimitMonitoringDepth = False
            script: same as in SCRUMSinglePlantingFromManager.Field.AutomaticFertiliser
          Report: same as SCRUMSinglePlantingFromManager.Field.Report
          Manager EndSim
```csharp
using System;
using Models.Core;
using Models.Interfaces;
using Models.Soils.Nutrients;
using Models.PMF;
using APSIM.Shared.Utilities;
using Models.PMF.SimplePlantModels;

namespace Models
{
    [Serializable]
    public class Script : Model
    {
        [Link] IClock clock;
        [Link] ISummary Summary;
        [Link] private Simulation sim;
        [Link] private ScrumCropInstance sm;
        
        [EventSubscribe("DoManagement")]
        private void OnDoManagement(object sender, EventArgs e)
        {
            
            if (clock.Today == sm.HarvestDate)
            {
                sim.Set("Clock.EndDate", clock.Today.AddDays(1));
            }
        }
    }
}
```
          ScrumCropInstance SCRUM_Wheat: HarvestIndex=0.5; MoistureContent=0; RootProportion=0.1; MaxRootDepth=3000; MaxHeight=1000; MaxCover=0.97; ExtinctionCoefficient=0.7; TypicalHarvestStage=Ripe; SeedlingNConc=0.05; ProductHarvestNConc=0.02; StoverHarvestNConc=0.01; RootNConc=0.01; LegumeFactor=0; BaseTemperature=0; OptimumTemperature=30; MaxTemperature=40; Tt_SowToEmergence=150; GSMax=0.008; R50=150; ConsiderWaterStress=true; EstablishDate=1998-10-14; EstablishStage=Seedling; PlantingDepth=20; ExpectedYield=10; Tt_EstablishmentToHarvest=1000; HarvestStage=Maturity; FieldLoss=0; ResidueRemoval=0; ResidueIncorporation=0; ResidueIncorporationDepth=0; Factor_XoBiomass=0.5; Factor_bBiomass=0.2; Factor_XoCover=0.4; Factor_bCover=0.2; Factor_XoHeight=0.7; Factor_bHeight=0.2; Tt_EmergenceToMaturity=0
    Experiment ForageVsSeed
      Memo
        This example shows how you would parameterise ScrumCropInstances to represent a crop harvested for forage at a vegetative stage or the same crop harvested for grain when it is ripe.
      Factors
        Permutation
          Factor HarvestStage
            CompositeFactor Grain
              Specifications:
                [SCRUM_Oat].TypicalHarvestStage = Ripe
                [SCRUM_Oat].HarvestIndex = 0.50
                [SCRUM_Oat].MoistureContent = 0.14
                [SCRUM_Oat].ProductHarvestNConc = 0.015
                [CropManagement].Script.EstablishDate = 1998-05-14
                [CropManagement].Script.HarvestDate = 1999-01-01
                [CropManagement].Script.HarvestStage = Ripe
                [CropManagement].Script.ExpectedYield = 10.5
            CompositeFactor Forage
              Specifications:
                [SCRUM_Oat].TypicalHarvestStage = Vegetative
                [SCRUM_Oat].HarvestIndex = 0.95
                [SCRUM_Oat].MoistureContent = 0.0
                [SCRUM_Oat].ProductHarvestNConc = 0.017
                [CropManagement].Script.EstablishDate = 1998-05-14
                [CropManagement].Script.HarvestDate = 1998-10-08
                [CropManagement].Script.HarvestStage = Vegetative
                [CropManagement].Script.ExpectedYield = 10.6
      Simulation EndUseTest
        Weather: FileName=%root%/Examples/WeatherFiles/NZ_Lincoln.met
        Clock: Start=1998-05-14; End=1999-03-01
        Summary
        SoilArbitrator Soil Arbitrator
        Zone Field: Area=1; Slope=0; AspectAngle=0; Altitude=50
          Soil: Latitude=0; Longitude=0
            Chemical: same as SCRUMSinglePlantingFromManager.Field.Soil.Chemical
            Water: Thickness=[100, 200, 300, 300, 300, 300]; InitialValues=[0.33, 0.33, 0.31, 0.15, 0.1, 0.06]; InitialPAWmm=180; RelativeTo=LL15; FilledFromTop=false
            Physical
              Thickness  ParticleSizeSand  ParticleSizeSilt  ParticleSizeClay  Rocks  BD   AirDry  LL15  DUL   SAT
              100        5                 65                30                0      1.2  0.08    0.13  0.33  0.5
              200        5                 65                30                0      1.2  0.13    0.13  0.33  0.5
              300        5                 65                30                0.135  1.2  0.1     0.1   0.31  0.44
              300        5                 65                30                0      1.2  0.06    0.06  0.15  0.46
              300        5                 65                30                0.135  1.2  0.04    0.04  0.1   0.44
              300        5                 65                30                0.135  1.2  0.02    0.02  0.06  0.44
              Rocks, ParticleSizeSand, ParticleSizeSilt, ParticleSizeClay source: Calculated
              SoilCrop SCRUMSoil: LL=[0.13, 0.13, 0.1, 0.08, 0.11, 0.11]; KL=[0.1, 0.1, 0.1, 0.1, 0.1, 0.1]; XF=[1, 1, 1, 1, 1, 1]
              SoilCrop PotatoSoil: LL=[0.13, 0.13, 0.27, 0.27, 0.3, 0.3]; KL=[0.1, 0.06, 0.03, 0.01, 0, 0]; XF=[1, 1, 0.1, 0, 0, 0]
            WaterBalance SoilWater: same as SCRUMSinglePlantingFromManager.Field.Soil.SoilWater
            Nutrient
            Organic: same as SCRUMSinglePlantingFromManager.Field.Soil.Organic
            LayerStructure
              Thickness=[100, 100, 100, 100, 100, 100, 100, 100, 100, 100, 100, 100, 100, 100, 100]
            Solute NO3: same as SCRUMSinglePlantingFromManager.Field.Soil.NO3
            Solute NH4: same as SCRUMSinglePlantingFromManager.Field.Soil.NH4
            Solute Urea: same as SCRUMSinglePlantingFromManager.Field.Soil.Urea
            SoilTemperature Temperature
          SurfaceOrganicMatter: InitialResidueName=wheat; InitialResidueType=wheat; InitialResidueMass=2000; InitialStandingFraction=0; InitialCPR=0; InitialCNR=80
          MicroClimate: a_interception=0; b_interception=1; c_interception=0; d_interception=0; SoilHeatFluxFraction=0.4; MinimumHeightDiffForNewLayer=0; NightInterceptionFraction=0.5; ReferenceHeight=2
          Plant SCRUM
          Irrigation
          Fertiliser
          Manager CropManagement
            CropName = SCRUM_Oat
            EstablishDate = 14/05/1998
            EstablishStage = Seed
            PlantingDepth = 15
            HarvestTimeOption = SettingDate
            HarvestDate = 01/01/1999
            Tt_EstablishToHarvest = 1000
            HarvestStage = Ripe
            ExpectedYield = 10
            FieldLoss = 0
            ResidueRemoval = 0
            ResidueIncorporation = 0
            ResidueIncorporationDepth = 0
            script: same as in Detailed Examples.EstablishAndHarvestAtDifferentStages.EstabAndHarv.Field.CropManagement
          Manager AutomaticIrrigation: same as SCRUMSinglePlantingFromManager.Field.AutomaticIrrigation
          Manager AutomaticFertiliser: same as SCRUMSinglePlantingFromManager.Field.AutomaticFertiliser
          Report: same as SCRUMSinglePlantingFromManager.Field.Report
          ScrumCropInstance SCRUM_Oat: HarvestIndex=0.45; MoistureContent=0.14; RootProportion=0.1; MaxRootDepth=1000; MaxHeight=700; MaxCover=0.97; ExtinctionCoefficient=0.8; TypicalHarvestStage=Maturity; SeedlingNConc=0.05; ProductHarvestNConc=0.03; StoverHarvestNConc=0.02; RootNConc=0.01; LegumeFactor=0; BaseTemperature=5; OptimumTemperature=30; MaxTemperature=40; Tt_SowToEmergence=0; GSMax=0.008; R50=150; ConsiderWaterStress=true; EstablishDate=1998-05-14; EstablishStage=Seed; PlantingDepth=15; ExpectedYield=10; HarvestDate=1999-02-01; Tt_EstablishmentToHarvest=0; HarvestStage=Ripe; FieldLoss=0; ResidueRemoval=0; ResidueIncorporation=0; ResidueIncorporationDepth=0; Factor_XoBiomass=0.5; Factor_bBiomass=0.2; Factor_XoCover=0.4; Factor_bCover=0.2; Factor_XoHeight=0.7; Factor_bHeight=0.2; Tt_EmergenceToMaturity=0
    Experiment StageForNconcParameters
      Memo
        This Example shows the effect of the stage that is chosen for representing harvest N concentrations
      Factors
        Permutation
          Factor HarvestStage
            CompositeFactor Ripe: Specifications=[SCRUM_Oat].TypicalHarvestStage = Ripe
            CompositeFactor Vegetative: Specifications=[SCRUM_Oat].TypicalHarvestStage = Vegetative
      Simulation NconcStage
        Weather: FileName=%root%/Examples/WeatherFiles/NZ_Lincoln.met
        Clock: Start=1998-05-14; End=1999-03-01
        Summary
        SoilArbitrator Soil Arbitrator
        Zone Field: Area=1; Slope=0; AspectAngle=0; Altitude=50
          Soil: same as SCRUMSinglePlantingFromManager.Field.Soil
          SurfaceOrganicMatter: InitialResidueName=wheat; InitialResidueType=wheat; InitialResidueMass=2000; InitialStandingFraction=0; InitialCPR=0; InitialCNR=80
          MicroClimate: a_interception=0; b_interception=1; c_interception=0; d_interception=0; SoilHeatFluxFraction=0.4; MinimumHeightDiffForNewLayer=0; NightInterceptionFraction=0.5; ReferenceHeight=2
          Plant SCRUM
          Irrigation
          Fertiliser
          Manager CropManagement
            CropName = SCRUM_Oat
            EstablishDate = 14/05/1998
            EstablishStage = Seed
            PlantingDepth = 15
            HarvestTimeOption = SettingDate
            HarvestDate = 01/02/1999
            Tt_EstablishToHarvest = 1000
            HarvestStage = Ripe
            ExpectedYield = 10
            FieldLoss = 0
            ResidueRemoval = 0
            ResidueIncorporation = 0
            ResidueIncorporationDepth = 0
            script: same as in Detailed Examples.EstablishAndHarvestAtDifferentStages.EstabAndHarv.Field.CropManagement
          Manager AutomaticIrrigation: same as SCRUMSinglePlantingFromManager.Field.AutomaticIrrigation
          Manager AutomaticFertiliser
            FertiliserIsEnabled = True
            SeasonStartDate = 1-Aug
            SeasonEndDate = 30-Apr
            OnlyApplyOntoCrop = False
            SeasonsAllocation = 1000
            TriggerSoilN = 100
            AmountToApply = 25
            FertiliserType = UreaN
            ReturnDays = 3
            DepthToMonitor = 300
            LimitMonitoringDepth = False
            script: same as in SCRUMSinglePlantingFromManager.Field.AutomaticFertiliser
          Report: same as SCRUMSinglePlantingFromManager.Field.Report
          ScrumCropInstance SCRUM_Oat: same as Detailed Examples.ForageVsSeed.EndUseTest.Field.SCRUM_Oat
    Experiment ResouceLimitation
      Memo
        This example shows how SCRUM responds to water and nitrogen stress
      Factors
        Permutation
          Factor _Irr
            CompositeFactor _No: Specifications=[AutomaticIrrigation].Script.Enabled = FALSE
            CompositeFactor _Yes: Specifications=[AutomaticIrrigation].Script.Enabled = TRUE
          Factor _Nit
            CompositeFactor _No: Specifications=[AutomaticFertiliser].Script.Enabled = FALSE
            CompositeFactor _Yes: Specifications=[AutomaticFertiliser].Script.Enabled = TRUE
      Simulation Test_ENK
        Weather: FileName=%root%/Examples/WeatherFiles/NZ_Lincoln.met
        Clock: Start=2010-09-20; End=2011-03-31
        Summary
        SoilArbitrator Soil Arbitrator
        Zone Field: Area=1; Slope=0; AspectAngle=0; Altitude=50
          Soil: SoilType=Mottled Immature Palic Soil; LocalName=Templeton; Site=A Block, PFR Research Farm; NearestTown=Lincoln; Region=Canterbury; Country=New Zealand; Latitude=-43.626; Longitude=172.468; YearOfSampling=2020
            DataSource=Data from analyses at PFR soil lab using samples from site, complemented with historical data from nearby studies and PTFs (Cichota et al, 2016). Pedological description by Thomas Caspari (MWLC)
            Comments=This represents an 'average' of the two profiles described at the site. Modified after sensibility tests and checks against field measured data.
            Memo
              # Notes

              Values for physical properties, particularly water storage limits and SWCon, were adjused after comparison against field-measured data.
              Values for FOM were based on expert opinion and adjusted after comparison with measured soil N data.
            Physical
              Thickness  ParticleSizeSand  ParticleSizeSilt  ParticleSizeClay  Rocks  BD     AirDry  LL15   DUL    SAT    KS
              100        15                63                22                0      1.23   0.05    0.145  0.3    0.535  480
              100        15                63                22                0      1.235  0.065   0.17   0.325  0.53   420
              200        12.5              66                21.5              0      1.375  0.07    0.18   0.35   0.481  240
              200        15                65                20                0      1.66   0.06    0.15   0.313  0.374  48
              200        5                 72.5              22.5              0      1.59   0.074   0.175  0.325  0.4    144
              200        45                47                8                 0      1.44   0.04    0.1    0.318  0.45   1200
              200        25                60                15                0      1.525  0.048   0.12   0.315  0.425  480
              200        60                35                5                 0      1.36   0.028   0.07   0.275  0.45   720
              200        50                44                6                 0      1.35   0.04    0.08   0.33   0.46   1200
              200        50                44                6                 0      1.35   0.032   0.08   0.3    0.455  1140
              SoilCrop SCRUMSoil
                LL=[0.145, 0.17, 0.18, 0.15, 0.175, 0.1, 0.12, 0.07, 0.08, 0.08]
                KL=[0.1, 0.1, 0.1, 0.1, 0.1, 0.1, 0.1, 0.1, 0.1, 0.1]
                XF=[1, 1, 1, 1, 1, 1, 1, 1, 1, 1]
            WaterBalance SoilWater: SummerDate=15-Oct; SummerU=8; SummerCona=4; WinterDate=15-Apr; WinterU=4.5; WinterCona=3; DiffusConst=88; DiffusSlope=35.4; Salb=0.2; CN2Bare=60; CNRed=20; CNCov=0.8; DischargeWidth=0; CatchmentArea=0; PSIDul=-100
              Thickness  SWCON  KLAT
              100        0.563  0
              100        0.56   0
              200        0.485  0
              200        0.489  0
              200        0.585  0
              200        0.545  0
              200        0.534  0
              200        0.508  0
              200        0.534  0
              200        0.533  0
            Organic: FOMCNRatio=40; CarbonUnits=Total
              Thickness  Carbon  SoilCNRatio  FBiom  FInert  FOM
              100        3       12           0.06   0.315   850
              100        2.75    12           0.046  0.522   500
              200        1.85    11.5         0.01   0.785   450
              200        0.4     10           0.008  0.899   175
              200        0.25    9.5          0.008  0.953   75
              200        0.2     9            0.008  0.969   25
              200        0.2     9            0.008  0.989   7.5
              200        0.15    9            0.008  0.99    2.5
              200        0.1     9            0.008  0.987   0
              200        0.1     9            0.008  0.988   0
            Chemical: Thickness=[150, 150, 300, 300, 300, 300, 300]; PH=[6.5, 6.5, 6.5, 6.5, 6.5, 6.5, 6.5]; PHUnits=Water
              CEC=[13.629, 13.0665, 10.7405, 7.245, 6.905, 5.601, 6.13, 5.6925, 5.177, 5.177]
              CEC source: Calculated
            Nutrient
            Water: Thickness=[100, 100, 200, 200, 200, 200, 200, 200, 200, 200]; InitialPAWmm=172.6; RelativeTo=LL15; FilledFromTop=false
              InitialValues=[0.2225, 0.2475, 0.265, 0.2315, 0.25, 0.209, 0.2175, 0.1725, 0.205, 0.19]
            OutputLayers OutputWaterLayers: Thickness=[200, 200, 200, 200, 200, 200, 200, 200, 200]
            OutputLayers OutputNutrientLayers: Thickness=[150, 150, 300, 300, 300, 300, 300]
            Solute NO3: Thickness=[150, 150, 300, 300, 300, 300, 300]; InitialValues=[1.4, 2.5, 11, 1.75, 1, 1, 1]; InitialValuesUnits=ppm; WaterTableConcentration=0; D0=0; DepthConstant=0; MaxDepthSoluteAccessible=0; RunoffEffectivenessAtMovingSolute=0; MaxEffectiveRunoff=0
            Solute NH4: Thickness=[150, 150, 300, 300, 300, 300, 300]; InitialValues=[1, 0.5, 0.1, 0.1, 0, 0, 0]; InitialValuesUnits=ppm; WaterTableConcentration=0; D0=0; DepthConstant=0; MaxDepthSoluteAccessible=0; RunoffEffectivenessAtMovingSolute=0; MaxEffectiveRunoff=0
            Solute Urea: Thickness=[150, 150, 300, 300, 300, 300, 300]; InitialValues=[0, 0, 0, 0, 0, 0, 0]; InitialValuesUnits=kg/ha; WaterTableConcentration=0; D0=0; DepthConstant=0; MaxDepthSoluteAccessible=0; RunoffEffectivenessAtMovingSolute=0; MaxEffectiveRunoff=0
            SoilTemperature Temperature
          SurfaceOrganicMatter: InitialResidueName=wheat; InitialResidueType=wheat; InitialResidueMass=2000; InitialStandingFraction=0; InitialCPR=0; InitialCNR=80
          MicroClimate: a_interception=0; b_interception=1; c_interception=0; d_interception=0; SoilHeatFluxFraction=0.4; MinimumHeightDiffForNewLayer=0; NightInterceptionFraction=0.5; ReferenceHeight=2
          Plant SCRUM
          Irrigation
          Fertiliser
          Manager CropManagement
            CropName = SCRUM_Wheat
            EstablishDate = 20/09/2010
            EstablishStage = Seed
            PlantingDepth = 20
            HarvestTimeOption = SettingDate
            HarvestDate = 28/02/2011
            Tt_EstablishToHarvest = 1000
            HarvestStage = Ripe
            ExpectedYield = 8
            FieldLoss = 0.05
            ResidueRemoval = 0.05
            ResidueIncorporation = 0.9
            ResidueIncorporationDepth = 100
            script: same as in Detailed Examples.EstablishAndHarvestAtDifferentStages.EstabAndHarv.Field.CropManagement
          Manager AutomaticIrrigation
            IrrigationIsEnabled = True
            SeasonStartDate = 20-Sep
            SeasonEndDate = 15-Dec
            OnlyApplyOntoCrop = True
            SeasonsAllocation = 1000
            TriggerFraction = 0.7
            RefillFraction = 0.9
            MaximumIrrigationAmount = 15
            ReturnDays = 5
            DepthToMonitor = 600
            LimitMonitoringDepth = True
            script: same as in SCRUMSinglePlantingFromManager.Field.AutomaticIrrigation
          Manager AutomaticFertiliser
            FertiliserIsEnabled = True
            SeasonStartDate = 20-Sep
            SeasonEndDate = 15-Dec
            OnlyApplyOntoCrop = True
            SeasonsAllocation = 500
            TriggerSoilN = 60
            AmountToApply = 30
            FertiliserType = NO3N
            ReturnDays = 7
            DepthToMonitor = 600
            LimitMonitoringDepth = True
            script: same as in SCRUMSinglePlantingFromManager.Field.AutomaticFertiliser
          Report ReportENK2: EventNames=[Clock].DoReport
            VariableNames:
              [AutomaticIrrigation].Script.AmountToApply
              [AutomaticIrrigation].Script.MonitoredLayerDUL
              [AutomaticIrrigation].Script.MonitoredLayerSW
              [AutomaticIrrigation].Script.MonitoredLayerTarget
              [AutomaticIrrigation].Script.MonitoredLayerTrigger
              [Clock].Today
              [Fertiliser].NitrogenApplied
              [Irrigation].IrrigationApplied
              [SCRUM].AboveGround.NConc
              [SCRUM].Arbitrator.DM.NutrientLimitation
              [SCRUM].Arbitrator.DM.SinkLimitation
              [SCRUM].Arbitrator.DM.TotalFixationSupply
              [SCRUM].Arbitrator.DM.TotalPlantDemand
              [SCRUM].Arbitrator.DM.TotalPlantSupply
              [SCRUM].Arbitrator.FN
              [SCRUM].Arbitrator.N.TotalPlantDemand
              [SCRUM].Arbitrator.N.TotalPlantSupply
              [SCRUM].Phenology.AccumulatedEmergedTt
              [SCRUM].Phenology.AccumulatedTt
              [SCRUM].Phenology.CurrentPhaseName
              [SCRUM].Phenology.CurrentStageName
              [SCRUM].Phenology.Stage
              [SCRUM].Phenology.ThermalTime
              [SCRUM].Product.Allocated.Wt
              [SCRUM].Product.CritNConc
              [SCRUM].Product.MaxNConc
              [SCRUM].Product.DMDemands.Structural.DMDemandFunction.PartitionFraction
              [SCRUM].Product.DryMatterContent
              [SCRUM].Product.ExpectedYield
              [SCRUM].Product.Live.N
              [SCRUM].Product.Live.NConc
              [SCRUM].Product.Live.Wt
              [SCRUM].Product.Yield
              [SCRUM].Root.Depth
              [SCRUM].Root.DMatHarvest
              [SCRUM].Root.DMDemands.Structural.DMDemandFunction.PartitionFraction
              [SCRUM].Root.Live.N
              [SCRUM].Root.Live.NConc
              [SCRUM].Root.Live.Wt
              [SCRUM].Root.WaterUptake
              [SCRUM].Root.FASW
              [SCRUM].Stover.CoverDead
              [SCRUM].Stover.CoverGreen
              [SCRUM].Stover.CoverTotal
              [SCRUM].Stover.MaxNConc
              [SCRUM].Stover.CritNConc
              [SCRUM].Stover.DMAtHarvest
              [SCRUM].Stover.DMDemands.Structural.DMDemandFunction.PartitionFraction
              [SCRUM].Stover.DMDemands.Structural
              [SCRUM].Stover.Fn
              [SCRUM].Stover.Fw
              [SCRUM].Stover.Height
              [SCRUM].Stover.LAI
              [SCRUM].Stover.LAIDead
              [SCRUM].Stover.LAITotal
              [SCRUM].Stover.Live.N
              [SCRUM].Stover.Live.NConc
              [SCRUM].Stover.Live.Wt
              [SCRUM].Stover.MinimumNConc
              [SCRUM].Stover.MaximumNConc
              [SCRUM].Stover.Photosynthesis
              [SCRUM].Stover.Transpiration
              [SCRUM].Stover.WaterDemand
              [SCRUM].Total.N
              [SCRUM].Total.Wt
              [SCRUM].Total.Wt/100 as TotalWt_ton
              [SCRUM].TotalDMAtHarvest
              [Soil].SoilWater.Drainage
              [Soil].SoilWater.Eo
              [Soil].SoilWater.Es
              [Soil].SoilWater.pond
              [Soil].SoilWater.Runoff
              [Soil].Water.MM
              [Soil].Nutrient.MineralN
              sum([Soil].Nutrient.MineralN) as ProfileN
              ([Soil].Nutrient.MineralN[1] +[Soil].Nutrient.MineralN[2]+[Soil].Nutrient.MineralN[3] +[Soil].Nutrient.MineralN[4]) as MinN_0_60
              sum([Soil].NO3.kgha)
              [Weather].Rain
          Manager EndSim: same as Detailed Examples.EstablishAndHarvestAtDifferentStages.EstabAndHarv.Field.EndSim
          ScrumCropInstance SCRUM_Wheat: HarvestIndex=0.45; MoistureContent=0.14; RootProportion=0.1; MaxRootDepth=1500; MaxHeight=1000; MaxCover=0.97; ExtinctionCoefficient=0.7; TypicalHarvestStage=Ripe; SeedlingNConc=0.05; ProductHarvestNConc=0.02; StoverHarvestNConc=0.01; RootNConc=0.01; LegumeFactor=0; BaseTemperature=0; OptimumTemperature=20; MaxTemperature=30; Tt_SowToEmergence=150; GSMax=0.008; R50=150; ConsiderWaterStress=true; EstablishDate=1998-10-14; EstablishStage=Seedling; PlantingDepth=20; ExpectedYield=10; Tt_EstablishmentToHarvest=1000; HarvestStage=Maturity; FieldLoss=0; ResidueRemoval=0; ResidueIncorporation=0; ResidueIncorporationDepth=0; Factor_XoBiomass=0.5; Factor_bBiomass=0.2; Factor_XoCover=0.4; Factor_bCover=0.2; Factor_XoHeight=0.7; Factor_bHeight=0.2; Tt_EmergenceToMaturity=0
    Experiment Defoliation
      Memo
        This example shows how biomass can be removed from SCRUM models using the BiomassRemovalsEvents model.  Note that SCRUM does not work with phenology rewinds so don't try to do that.
      Factors
        Permutation
          Factor Cuts
            CompositeFactor Zero: Specifications=[SCRUM_Cut].RemovalDates = 2001-07-15
            CompositeFactor OneEarly: Specifications=[SCRUM_Cut].RemovalDates = 2000-12-20
            CompositeFactor OneMid: Specifications=[SCRUM_Cut].RemovalDates = 2001-02-20
            CompositeFactor OneLate: Specifications=[SCRUM_Cut].RemovalDates = 2001-04-20
            CompositeFactor Two: Specifications=[SCRUM_Cut].RemovalDates = 2001-01-15, 2001-03-15
      Simulation SCRUMDefoliation
        Weather: FileName=%root%/Examples/WeatherFiles/NZ_Lincoln.met
        Clock: Start=2000-07-01; End=2001-06-30
        Summary
        SoilArbitrator Soil Arbitrator
        Zone Field: Area=1; Slope=0; AspectAngle=0; Altitude=50
          Soil: Latitude=0; Longitude=0
            Chemical: Thickness=[100, 200, 300, 300, 300, 300]; PH=[6.6, 6.2, 5.7, 5.5, 5.5, 5.5]; PHUnits=Water
            Water: Thickness=[100, 200, 300, 300, 300, 300]; InitialValues=[0.33, 0.33, 0.31, 0.15, 0.1, 0.06]; InitialPAWmm=180; RelativeTo=LL15; FilledFromTop=false
            Physical
              Thickness  BD   AirDry  LL15  DUL   SAT
              100        1.2  0.08    0.13  0.33  0.5
              200        1.2  0.13    0.13  0.33  0.5
              300        1.2  0.1     0.1   0.31  0.44
              300        1.2  0.06    0.06  0.15  0.46
              300        1.2  0.04    0.04  0.1   0.44
              300        1.2  0.02    0.02  0.06  0.44
              SoilCrop SCRUMSoil: LL=[0.13, 0.13, 0.1, 0.08, 0.11, 0.11]; KL=[0.1, 0.1, 0.1, 0.1, 0.1, 0.1]; XF=[1, 1, 1, 1, 1, 1]
              SoilCrop PotatoSoil: LL=[0.13, 0.13, 0.27, 0.27, 0.3, 0.3]; KL=[0.1, 0.06, 0.03, 0.01, 0, 0]; XF=[1, 1, 0.1, 0, 0, 0]
            WaterBalance SoilWater: same as SCRUMSinglePlantingFromManager.Field.Soil.SoilWater
            Nutrient
            Organic: same as SCRUMSinglePlantingFromManager.Field.Soil.Organic
            LayerStructure
              Thickness=[100, 100, 100, 100, 100, 100, 100, 100, 100, 100, 100, 100, 100, 100, 100]
            Solute NO3: same as SCRUMRotationFromManager.Field.Soil.NO3
            Solute NH4: same as SCRUMSinglePlantingFromManager.Field.Soil.NH4
            Solute Urea: same as SCRUMSinglePlantingFromManager.Field.Soil.Urea
            SoilTemperature Temperature
          SurfaceOrganicMatter: InitialResidueName=wheat; InitialResidueType=wheat; InitialResidueMass=2000; InitialStandingFraction=0; InitialCPR=0; InitialCNR=80
          MicroClimate: a_interception=0; b_interception=1; c_interception=0; d_interception=0; SoilHeatFluxFraction=0.4; MinimumHeightDiffForNewLayer=0; NightInterceptionFraction=0.5; ReferenceHeight=2
          Plant SCRUM
          Irrigation
          Fertiliser
          Manager CropManagement
            CropName = SCRUM_Ryegrass
            EstablishDate = 14/08/2000
            EstablishStage = Seed
            PlantingDepth = 15
            HarvestTimeOption = SettingDate
            HarvestDate = 01/06/2001
            Tt_EstablishToHarvest = 1000
            HarvestStage = Ripe
            ExpectedYield = 1.5
            FieldLoss = 0
            ResidueRemoval = 0
            ResidueIncorporation = 0
            ResidueIncorporationDepth = 0
            script: same as in Detailed Examples.EstablishAndHarvestAtDifferentStages.EstabAndHarv.Field.CropManagement
          Manager AutomaticIrrigation: same as SCRUMSinglePlantingFromManager.Field.AutomaticIrrigation
          Manager AutomaticFertiliser
            FertiliserIsEnabled = True
            SeasonStartDate = 1-Aug
            SeasonEndDate = 30-Apr
            OnlyApplyOntoCrop = True
            SeasonsAllocation = 1000
            TriggerSoilN = 50
            AmountToApply = 25
            FertiliserType = NO3N
            ReturnDays = 3
            DepthToMonitor = 300
            LimitMonitoringDepth = False
            script: same as in SCRUMSinglePlantingFromManager.Field.AutomaticFertiliser
          Report: EventNames=[Clock].DoReport
            VariableNames:
              [Clock].Today
              [SCRUM].SowingData.Cultivar
              // SCRUM Biomass
              [SCRUM].Total.Wt
              [SCRUM].Total.N
              [SCRUM].TotalDMAtHarvest
              [SCRUM].Product.Live.Wt
              [SCRUM].Product.Live.N
              [SCRUM].Product.Live.NConc
              [SCRUM].Product.DMAtHarvest
              [SCRUM].Product.ExpectedYield
              [SCRUM].Product.DryMatterContent
              [SCRUM].Product.Yield
              [SCRUM].Stover.Live.Wt
              [SCRUM].Stover.Live.N
              [SCRUM].Stover.Live.NConc
              [SCRUM].Stover.DMAtHarvest
              [SCRUM].Stover.Height
              [SCRUM].Stover.LAI
              [SCRUM].Stover.LAIDead
              [SCRUM].Stover.LAITotal
              [SCRUM].Stover.CoverDead
              [SCRUM].Stover.CoverGreen
              [SCRUM].Stover.CoverTotal
              [SCRUM].Root.Live.Wt
              [SCRUM].Root.Live.N
              [SCRUM].Root.Live.NConc
              [SCRUM].Root.DMatHarvest
              [SCRUM].Root.Depth
              // SCRUM Phenology
              [SCRUM].Phenology.AccumulatedEmergedTt
              [SCRUM].Phenology.AccumulatedTt
              [SCRUM].Phenology.CurrentPhaseName
              [SCRUM].Phenology.CurrentStageName
              [SCRUM].Phenology.Stage
              [SCRUM].Phenology.ThermalTime
              // SCRUM Allocation
              [SCRUM].Product.DMDemands.Structural.DMDemandFunction.PartitionFraction
              [SCRUM].Stover.DMDemands.Structural.DMDemandFunction.PartitionFraction
              [SCRUM].Root.DMDemands.Structural.DMDemandFunction.PartitionFraction
              [SCRUM].Arbitrator.DM.TotalPlantDemand
              [SCRUM].Arbitrator.DM.TotalFixationSupply
              [SCRUM].Arbitrator.N.TotalPlantDemand
              [SCRUM].Arbitrator.N.TotalPlantSupply
              [SCRUM].Arbitrator.N.TotalPlantSupply
              [SCRUM].Product.Allocated.Wt
              [SCRUM].Stover.Allocated.Wt
              [SCRUM].Root.Allocated.Wt
              // SCRUM limiting factors
              [SCRUM].Arbitrator.DM.NutrientLimitation
              [SCRUM].Arbitrator.DM.SinkLimitation
              [SCRUM].Arbitrator.FN
              [SCRUM].Stover.Fn
              [SCRUM].Stover.Fw
              // Water balance
              sum([Soil].SoilWater.SWmm) as SoilTotalWater
              [Soil].SoilWater.Drainage
              [Soil].SoilWater.Es
              [Soil].SoilWater.Runoff
              [Irrigation].IrrigationApplied
              [SCRUM].Stover.WaterDemand
              [SCRUM].Stover.Transpiration
              [SCRUM].Root.WaterUptake
              [AutomaticIrrigation].Script.AmountToApply
              [AutomaticIrrigation].Script.MonitoredLayerLL
              [AutomaticIrrigation].Script.MonitoredLayerDUL
              [AutomaticIrrigation].Script.MonitoredLayerSW
              [AutomaticIrrigation].Script.MonitoredLayerTarget
              [AutomaticIrrigation].Script.MonitoredLayerTrigger
              // Nitrogen balance
              sum([Soil].Nutrient.MineralN) as TotalSoilNitrogen
              [Fertiliser].NitrogenApplied
              [Soil].SoilWater.LeachNO3
              [Soil].Nutrient.DenitrifiedN
              [SCRUM].Root.NUptake
              [AutomaticFertiliser].Script.MonitoredLayerSoilN
              [AutomaticFertiliser].Script.AmountToApply
              // Biomass removal
              [SCRUM].Product.Removed.Wt
              [SCRUM].Stover.Removed.Wt
              [SCRUM].Root.Removed.Wt
              ([SCRUM].Product.Removed.Wt + [SCRUM].Stover.Removed.Wt + [SCRUM].Root.Removed.Wt) as SCRUM.Total.Removed.Wt
          ScrumCropInstance SCRUM_Ryegrass: HarvestIndex=0.14; MoistureContent=0.14; RootProportion=0.1; MaxRootDepth=1500; MaxHeight=500; MaxCover=0.97; ExtinctionCoefficient=0.86; TypicalHarvestStage=Ripe; SeedlingNConc=0.06; ProductHarvestNConc=0.02; StoverHarvestNConc=0.02; RootNConc=0.01; LegumeFactor=0; BaseTemperature=0; OptimumTemperature=20; MaxTemperature=35; Tt_SowToEmergence=200; GSMax=0.008; R50=150; ConsiderWaterStress=true; EstablishStage=Seed; HarvestStage=MidReproductive; FieldLoss=0; ResidueRemoval=0; ResidueIncorporation=0; ResidueIncorporationDepth=0; Factor_XoBiomass=0.5; Factor_bBiomass=0.2; Factor_XoCover=0.4; Factor_bCover=0.2; Factor_XoHeight=0.7; Factor_bHeight=0.2; Tt_EmergenceToMaturity=0
          BiomassRemovalEvents SCRUM_Cut: NameOfPlantToRemoveFrom=SCRUM; RemovalType=1; RemovalDates=[25/01/2001]
            BiomassRemovalFractions:
              PlantName  OrganName  TypeString  LiveToRemove  DeadToRemove  LiveToResidue  DeadToResidue
              SCRUM      Product    Grazing     0.5           0             0              1
              SCRUM      Stover     Grazing     0.5           0             0              1
              SCRUM      Root       Grazing     0             0             0              0
              SCRUM      Nodule     Grazing     0             0             0              0
  Memo Example ScrumCropInstances
    This file contans many example ScrumCropInstances that have been generated from a combination of compiled data from literature and unpublished studies and extrapolated from similar crop types and adusted using expert opinion.  They are generic representations or crops and are included as a start point for users to further refine.  They are not officially released models and they have not been reviewd by the Apsim reference pannel so users are expected to review each of the coefficients carefully to ensure they are appropriate to represent the crops being simulated.
  ScrumCropInstance Fodder Beet: HarvestIndex=0.8895; RootProportion=0.1; MaxRootDepth=1500; MaxHeight=500; MaxCover=0.97; ExtinctionCoefficient=0.5; TypicalHarvestStage=EarlyReproductive; SeedlingNConc=0.05; ProductHarvestNConc=0.01; StoverHarvestNConc=0.015; RootNConc=0.008; BaseTemperature=1; OptimumTemperature=25; MaxTemperature=35; Tt_SowToEmergence=100; GSMax=0.008; R50=150; ConsiderWaterStress=true; Factor_XoBiomass=0.5; Factor_bBiomass=0.2; Factor_XoCover=0.4; Factor_bCover=0.2; Factor_XoHeight=0.7; Factor_bHeight=0.2
    zero: MoistureContent, LegumeFactor, PlantingDepth, ExpectedYield, Tt_EstablishmentToHarvest, FieldLoss, ResidueRemoval, ResidueIncorporation, ResidueIncorporationDepth, Tt_EmergenceToMaturity
  ScrumCropInstance Fodder Swede: HarvestIndex=0.834; RootProportion=0.1; MaxRootDepth=1200; MaxHeight=500; MaxCover=0.97; ExtinctionCoefficient=1; TypicalHarvestStage=LateReproductive; SeedlingNConc=0.05; ProductHarvestNConc=0.025; StoverHarvestNConc=0.006; RootNConc=0.008; BaseTemperature=1; OptimumTemperature=25; MaxTemperature=35; Tt_SowToEmergence=100; GSMax=0.008; R50=150; ConsiderWaterStress=true; Factor_XoBiomass=0.5; Factor_bBiomass=0.2; Factor_XoCover=0.4; Factor_bCover=0.2; Factor_XoHeight=0.7; Factor_bHeight=0.2
    zero: MoistureContent, LegumeFactor, PlantingDepth, ExpectedYield, Tt_EstablishmentToHarvest, FieldLoss, ResidueRemoval, ResidueIncorporation, ResidueIncorporationDepth, Tt_EmergenceToMaturity
  ScrumCropInstance Fodder Rape: HarvestIndex=0.778; RootProportion=0.1; MaxRootDepth=1200; MaxHeight=400; MaxCover=0.97; ExtinctionCoefficient=1; TypicalHarvestStage=EarlyReproductive; SeedlingNConc=0.05; ProductHarvestNConc=0.03; StoverHarvestNConc=0.01; RootNConc=0.008; BaseTemperature=1; OptimumTemperature=25; MaxTemperature=35; Tt_SowToEmergence=100; GSMax=0.008; R50=150; ConsiderWaterStress=true; Factor_XoBiomass=0.5; Factor_bBiomass=0.2; Factor_XoCover=0.4; Factor_bCover=0.2; Factor_XoHeight=0.7; Factor_bHeight=0.2
    zero: MoistureContent, LegumeFactor, PlantingDepth, ExpectedYield, Tt_EstablishmentToHarvest, FieldLoss, ResidueRemoval, ResidueIncorporation, ResidueIncorporationDepth, Tt_EmergenceToMaturity
  ScrumCropInstance Fodder Kale: HarvestIndex=0.58; RootProportion=0.1; MaxRootDepth=1200; MaxHeight=1500; MaxCover=0.97; ExtinctionCoefficient=1; TypicalHarvestStage=LateReproductive; SeedlingNConc=0.05; ProductHarvestNConc=0.03; StoverHarvestNConc=0.01; RootNConc=0.008; BaseTemperature=1; OptimumTemperature=25; MaxTemperature=35; Tt_SowToEmergence=100; GSMax=0.008; R50=150; ConsiderWaterStress=true; Factor_XoBiomass=0.5; Factor_bBiomass=0.2; Factor_XoCover=0.4; Factor_bCover=0.2; Factor_XoHeight=0.7; Factor_bHeight=0.2
    zero: MoistureContent, LegumeFactor, PlantingDepth, ExpectedYield, Tt_EstablishmentToHarvest, FieldLoss, ResidueRemoval, ResidueIncorporation, ResidueIncorporationDepth, Tt_EmergenceToMaturity
  ScrumCropInstance Fodder Turnip Bulb: HarvestIndex=0.872; RootProportion=0.1; MaxRootDepth=1200; MaxHeight=300; MaxCover=0.97; ExtinctionCoefficient=1; TypicalHarvestStage=EarlyReproductive; SeedlingNConc=0.05; ProductHarvestNConc=0.025; StoverHarvestNConc=0.006; RootNConc=0.008; BaseTemperature=1; OptimumTemperature=25; MaxTemperature=35; Tt_SowToEmergence=100; GSMax=0.008; R50=150; ConsiderWaterStress=true; Factor_XoBiomass=0.5; Factor_bBiomass=0.2; Factor_XoCover=0.4; Factor_bCover=0.2; Factor_XoHeight=0.7; Factor_bHeight=0.2
    zero: MoistureContent, LegumeFactor, PlantingDepth, ExpectedYield, Tt_EstablishmentToHarvest, FieldLoss, ResidueRemoval, ResidueIncorporation, ResidueIncorporationDepth, Tt_EmergenceToMaturity
  ScrumCropInstance Fodder Turnip Leafy: HarvestIndex=0.49; RootProportion=0.1; MaxRootDepth=1200; MaxHeight=500; MaxCover=0.97; ExtinctionCoefficient=1; TypicalHarvestStage=Vegetative; SeedlingNConc=0.05; ProductHarvestNConc=0.035; StoverHarvestNConc=0.015; RootNConc=0.008; BaseTemperature=1; OptimumTemperature=25; MaxTemperature=35; Tt_SowToEmergence=100; GSMax=0.008; R50=150; ConsiderWaterStress=true; Factor_XoBiomass=0.5; Factor_bBiomass=0.2; Factor_XoCover=0.4; Factor_bCover=0.2; Factor_XoHeight=0.7; Factor_bHeight=0.2
    zero: MoistureContent, LegumeFactor, PlantingDepth, ExpectedYield, Tt_EstablishmentToHarvest, FieldLoss, ResidueRemoval, ResidueIncorporation, ResidueIncorporationDepth, Tt_EmergenceToMaturity
  ScrumCropInstance Fodder Annual ryegrass: HarvestIndex=0.95; RootProportion=0.1; MaxRootDepth=900; MaxHeight=400; MaxCover=0.97; ExtinctionCoefficient=0.75; TypicalHarvestStage=EarlyReproductive; SeedlingNConc=0.05; ProductHarvestNConc=0.025; StoverHarvestNConc=0.01; RootNConc=0.009; BaseTemperature=1; OptimumTemperature=25; MaxTemperature=35; Tt_SowToEmergence=100; GSMax=0.008; R50=150; ConsiderWaterStress=true; Factor_XoBiomass=0.5; Factor_bBiomass=0.2; Factor_XoCover=0.4; Factor_bCover=0.2; Factor_XoHeight=0.7; Factor_bHeight=0.2
    zero: MoistureContent, LegumeFactor, PlantingDepth, ExpectedYield, Tt_EstablishmentToHarvest, FieldLoss, ResidueRemoval, ResidueIncorporation, ResidueIncorporationDepth, Tt_EmergenceToMaturity
  ScrumCropInstance Fodder Oat: HarvestIndex=0.95; RootProportion=0.1; MaxRootDepth=1500; MaxHeight=400; MaxCover=0.97; ExtinctionCoefficient=0.5; TypicalHarvestStage=EarlyReproductive; SeedlingNConc=0.05; ProductHarvestNConc=0.013; StoverHarvestNConc=0.005; RootNConc=0.009; BaseTemperature=1; OptimumTemperature=25; MaxTemperature=35; Tt_SowToEmergence=100; GSMax=0.008; R50=150; ConsiderWaterStress=true; Factor_XoBiomass=0.5; Factor_bBiomass=0.2; Factor_XoCover=0.4; Factor_bCover=0.2; Factor_XoHeight=0.7; Factor_bHeight=0.2
    zero: MoistureContent, LegumeFactor, PlantingDepth, ExpectedYield, Tt_EstablishmentToHarvest, FieldLoss, ResidueRemoval, ResidueIncorporation, ResidueIncorporationDepth, Tt_EmergenceToMaturity
  ScrumCropInstance Fodder Barley: HarvestIndex=0.95; RootProportion=0.1; MaxRootDepth=1200; MaxHeight=400; MaxCover=0.97; ExtinctionCoefficient=0.5; TypicalHarvestStage=EarlyReproductive; SeedlingNConc=0.05; ProductHarvestNConc=0.013; StoverHarvestNConc=0.005; RootNConc=0.009; BaseTemperature=1; OptimumTemperature=25; MaxTemperature=35; Tt_SowToEmergence=100; GSMax=0.008; R50=150; ConsiderWaterStress=true; Factor_XoBiomass=0.5; Factor_bBiomass=0.2; Factor_XoCover=0.4; Factor_bCover=0.2; Factor_XoHeight=0.7; Factor_bHeight=0.2
    zero: MoistureContent, LegumeFactor, PlantingDepth, ExpectedYield, Tt_EstablishmentToHarvest, FieldLoss, ResidueRemoval, ResidueIncorporation, ResidueIncorporationDepth, Tt_EmergenceToMaturity
  ScrumCropInstance Fodder Ryecorn: HarvestIndex=0.95; RootProportion=0.1; MaxRootDepth=1500; MaxHeight=500; MaxCover=0.97; ExtinctionCoefficient=0.5; TypicalHarvestStage=EarlyReproductive; SeedlingNConc=0.05; ProductHarvestNConc=0.013; StoverHarvestNConc=0.005; RootNConc=0.009; BaseTemperature=1; OptimumTemperature=25; MaxTemperature=35; Tt_SowToEmergence=100; GSMax=0.008; R50=150; ConsiderWaterStress=true; Factor_XoBiomass=0.5; Factor_bBiomass=0.2; Factor_XoCover=0.4; Factor_bCover=0.2; Factor_XoHeight=0.7; Factor_bHeight=0.2
    zero: MoistureContent, LegumeFactor, PlantingDepth, ExpectedYield, Tt_EstablishmentToHarvest, FieldLoss, ResidueRemoval, ResidueIncorporation, ResidueIncorporationDepth, Tt_EmergenceToMaturity
  ScrumCropInstance Fodder Triticale: same as Fodder Ryecorn
  ScrumCropInstance Grain Oat: HarvestIndex=0.4; MoistureContent=0.13; RootProportion=0.1; MaxRootDepth=1500; MaxHeight=1000; MaxCover=0.97; ExtinctionCoefficient=0.5; TypicalHarvestStage=Maturity; SeedlingNConc=0.05; ProductHarvestNConc=0.013; StoverHarvestNConc=0.005; RootNConc=0.009; BaseTemperature=1; OptimumTemperature=25; MaxTemperature=35; Tt_SowToEmergence=100; GSMax=0.008; R50=150; ConsiderWaterStress=true; Factor_XoBiomass=0.5; Factor_bBiomass=0.2; Factor_XoCover=0.4; Factor_bCover=0.2; Factor_XoHeight=0.7; Factor_bHeight=0.2
    zero: LegumeFactor, PlantingDepth, ExpectedYield, Tt_EstablishmentToHarvest, FieldLoss, ResidueRemoval, ResidueIncorporation, ResidueIncorporationDepth, Tt_EmergenceToMaturity
  ScrumCropInstance Grain Canola: HarvestIndex=0.27; MoistureContent=0.09; RootProportion=0.1; MaxRootDepth=1200; MaxHeight=600; MaxCover=0.97; ExtinctionCoefficient=1; TypicalHarvestStage=LateReproductive; SeedlingNConc=0.05; ProductHarvestNConc=0.0322; StoverHarvestNConc=0.0115; RootNConc=0.008; BaseTemperature=1; OptimumTemperature=25; MaxTemperature=35; Tt_SowToEmergence=100; GSMax=0.008; R50=150; ConsiderWaterStress=true; Factor_XoBiomass=0.5; Factor_bBiomass=0.2; Factor_XoCover=0.4; Factor_bCover=0.2; Factor_XoHeight=0.7; Factor_bHeight=0.2
    zero: LegumeFactor, PlantingDepth, ExpectedYield, Tt_EstablishmentToHarvest, FieldLoss, ResidueRemoval, ResidueIncorporation, ResidueIncorporationDepth, Tt_EmergenceToMaturity
  ScrumCropInstance Grain Hemp: HarvestIndex=0.1; MoistureContent=0.09; RootProportion=0.1; MaxRootDepth=1500; MaxHeight=900; MaxCover=0.97; ExtinctionCoefficient=0.5; TypicalHarvestStage=Maturity; SeedlingNConc=0.05; ProductHarvestNConc=0.04; StoverHarvestNConc=0.01; RootNConc=0.01; BaseTemperature=5; OptimumTemperature=30; MaxTemperature=40; Tt_SowToEmergence=100; GSMax=0.008; R50=150; ConsiderWaterStress=true; Factor_XoBiomass=0.5; Factor_bBiomass=0.2; Factor_XoCover=0.4; Factor_bCover=0.2; Factor_XoHeight=0.7; Factor_bHeight=0.2
    zero: LegumeFactor, PlantingDepth, ExpectedYield, Tt_EstablishmentToHarvest, FieldLoss, ResidueRemoval, ResidueIncorporation, ResidueIncorporationDepth, Tt_EmergenceToMaturity
  ScrumCropInstance Grain Chickpea: HarvestIndex=0.3; MoistureContent=0.15; RootProportion=0.1; MaxRootDepth=1000; MaxHeight=600; MaxCover=0.97; ExtinctionCoefficient=0.5; TypicalHarvestStage=LateReproductive; SeedlingNConc=0.05; ProductHarvestNConc=0.047; StoverHarvestNConc=0.016; RootNConc=0.015; LegumeFactor=1; BaseTemperature=5; OptimumTemperature=30; MaxTemperature=40; Tt_SowToEmergence=100; GSMax=0.008; R50=150; ConsiderWaterStress=true; PlantingDepth=0; ExpectedYield=0; Tt_EstablishmentToHarvest=0; FieldLoss=0; ResidueRemoval=0; ResidueIncorporation=0; ResidueIncorporationDepth=0; Factor_XoBiomass=0.5; Factor_bBiomass=0.2; Factor_XoCover=0.4; Factor_bCover=0.2; Factor_XoHeight=0.7; Factor_bHeight=0.2; Tt_EmergenceToMaturity=0
  ScrumCropInstance Grain Sunflower: HarvestIndex=0.3; MoistureContent=0.08; RootProportion=0.1; MaxRootDepth=1500; MaxHeight=1500; MaxCover=0.97; ExtinctionCoefficient=0.5; TypicalHarvestStage=Maturity; SeedlingNConc=0.05; ProductHarvestNConc=0.024; StoverHarvestNConc=0.013; RootNConc=0.009; BaseTemperature=5; OptimumTemperature=30; MaxTemperature=40; Tt_SowToEmergence=100; GSMax=0.008; R50=150; ConsiderWaterStress=true; Factor_XoBiomass=0.5; Factor_bBiomass=0.2; Factor_XoCover=0.4; Factor_bCover=0.2; Factor_XoHeight=0.7; Factor_bHeight=0.2
    zero: LegumeFactor, PlantingDepth, ExpectedYield, Tt_EstablishmentToHarvest, FieldLoss, ResidueRemoval, ResidueIncorporation, ResidueIncorporationDepth, Tt_EmergenceToMaturity
  ScrumCropInstance Grain Barley: HarvestIndex=0.463; MoistureContent=0.13; RootProportion=0.1; MaxRootDepth=1200; MaxHeight=1000; MaxCover=0.97; ExtinctionCoefficient=0.5; TypicalHarvestStage=Maturity; SeedlingNConc=0.05; ProductHarvestNConc=0.012; StoverHarvestNConc=0.005; RootNConc=0.009; BaseTemperature=1; OptimumTemperature=25; MaxTemperature=35; Tt_SowToEmergence=100; GSMax=0.008; R50=150; ConsiderWaterStress=true; Factor_XoBiomass=0.5; Factor_bBiomass=0.2; Factor_XoCover=0.4; Factor_bCover=0.2; Factor_XoHeight=0.7; Factor_bHeight=0.2
    zero: LegumeFactor, PlantingDepth, ExpectedYield, Tt_EstablishmentToHarvest, FieldLoss, ResidueRemoval, ResidueIncorporation, ResidueIncorporationDepth, Tt_EmergenceToMaturity
  ScrumCropInstance Grain Lentil: HarvestIndex=0.5; MoistureContent=0.14; RootProportion=0.1; MaxRootDepth=1000; MaxHeight=500; MaxCover=0.97; ExtinctionCoefficient=0.5; TypicalHarvestStage=Maturity; SeedlingNConc=0.05; ProductHarvestNConc=0.035; StoverHarvestNConc=0.016; RootNConc=0.015; LegumeFactor=1; BaseTemperature=5; OptimumTemperature=30; MaxTemperature=40; Tt_SowToEmergence=100; GSMax=0.008; R50=150; ConsiderWaterStress=true; PlantingDepth=0; ExpectedYield=0; Tt_EstablishmentToHarvest=0; FieldLoss=0; ResidueRemoval=0; ResidueIncorporation=0; ResidueIncorporationDepth=0; Factor_XoBiomass=0.5; Factor_bBiomass=0.2; Factor_XoCover=0.4; Factor_bCover=0.2; Factor_XoHeight=0.7; Factor_bHeight=0.2; Tt_EmergenceToMaturity=0
  ScrumCropInstance Grain Linseed: HarvestIndex=0.208333; MoistureContent=0.09; RootProportion=0.1; MaxRootDepth=1000; MaxHeight=500; MaxCover=0.97; ExtinctionCoefficient=0.5; TypicalHarvestStage=LateReproductive; SeedlingNConc=0.05; ProductHarvestNConc=0.043; StoverHarvestNConc=0.01; RootNConc=0.01; BaseTemperature=1; OptimumTemperature=25; MaxTemperature=35; Tt_SowToEmergence=100; GSMax=0.008; R50=150; ConsiderWaterStress=true; Factor_XoBiomass=0.5; Factor_bBiomass=0.2; Factor_XoCover=0.4; Factor_bCover=0.2; Factor_XoHeight=0.7; Factor_bHeight=0.2
    zero: LegumeFactor, PlantingDepth, ExpectedYield, Tt_EstablishmentToHarvest, FieldLoss, ResidueRemoval, ResidueIncorporation, ResidueIncorporationDepth, Tt_EmergenceToMaturity
  ScrumCropInstance Grain Bean: HarvestIndex=0.5; MoistureContent=0.14; RootProportion=0.1; MaxRootDepth=1000; MaxHeight=1000; MaxCover=0.97; ExtinctionCoefficient=0.5; TypicalHarvestStage=Maturity; SeedlingNConc=0.05; ProductHarvestNConc=0.035; StoverHarvestNConc=0.016; RootNConc=0.015; LegumeFactor=1; BaseTemperature=5; OptimumTemperature=30; MaxTemperature=40; Tt_SowToEmergence=100; GSMax=0.008; R50=150; ConsiderWaterStress=true; PlantingDepth=0; ExpectedYield=0; Tt_EstablishmentToHarvest=0; FieldLoss=0; ResidueRemoval=0; ResidueIncorporation=0; ResidueIncorporationDepth=0; Factor_XoBiomass=0.5; Factor_bBiomass=0.2; Factor_XoCover=0.4; Factor_bCover=0.2; Factor_XoHeight=0.7; Factor_bHeight=0.2; Tt_EmergenceToMaturity=0
  ScrumCropInstance Grain Pea: HarvestIndex=0.3; MoistureContent=0.14; RootProportion=0.1; MaxRootDepth=700; MaxHeight=500; MaxCover=0.97; ExtinctionCoefficient=0.5; TypicalHarvestStage=Maturity; SeedlingNConc=0.05; ProductHarvestNConc=0.047; StoverHarvestNConc=0.016; RootNConc=0.015; LegumeFactor=1; BaseTemperature=5; OptimumTemperature=30; MaxTemperature=40; Tt_SowToEmergence=100; GSMax=0.008; R50=150; ConsiderWaterStress=true; PlantingDepth=0; ExpectedYield=0; Tt_EstablishmentToHarvest=0; FieldLoss=0; ResidueRemoval=0; ResidueIncorporation=0; ResidueIncorporationDepth=0; Factor_XoBiomass=0.5; Factor_bBiomass=0.2; Factor_XoCover=0.4; Factor_bCover=0.2; Factor_XoHeight=0.7; Factor_bHeight=0.2; Tt_EmergenceToMaturity=0
  ScrumCropInstance Grain Wheat Breed: HarvestIndex=0.4117; MoistureContent=0.13; RootProportion=0.1; MaxRootDepth=1500; MaxHeight=1000; MaxCover=0.97; ExtinctionCoefficient=0.5; TypicalHarvestStage=Maturity; SeedlingNConc=0.05; ProductHarvestNConc=0.015; StoverHarvestNConc=0.005; RootNConc=0.009; BaseTemperature=1; OptimumTemperature=25; MaxTemperature=35; Tt_SowToEmergence=100; GSMax=0.008; R50=150; ConsiderWaterStress=true; Factor_XoBiomass=0.5; Factor_bBiomass=0.2; Factor_XoCover=0.4; Factor_bCover=0.2; Factor_XoHeight=0.7; Factor_bHeight=0.2
    zero: LegumeFactor, PlantingDepth, ExpectedYield, Tt_EstablishmentToHarvest, FieldLoss, ResidueRemoval, ResidueIncorporation, ResidueIncorporationDepth, Tt_EmergenceToMaturity
  ScrumCropInstance Grain Wheat Feed: HarvestIndex=0.4117; MoistureContent=0.13; RootProportion=0.1; MaxRootDepth=1500; MaxHeight=1000; MaxCover=0.97; ExtinctionCoefficient=0.5; TypicalHarvestStage=Maturity; SeedlingNConc=0.05; ProductHarvestNConc=0.012; StoverHarvestNConc=0.005; RootNConc=0.009; BaseTemperature=1; OptimumTemperature=25; MaxTemperature=35; Tt_SowToEmergence=100; GSMax=0.008; R50=150; ConsiderWaterStress=true; Factor_XoBiomass=0.5; Factor_bBiomass=0.2; Factor_XoCover=0.4; Factor_bCover=0.2; Factor_XoHeight=0.7; Factor_bHeight=0.2
    zero: LegumeFactor, PlantingDepth, ExpectedYield, Tt_EstablishmentToHarvest, FieldLoss, ResidueRemoval, ResidueIncorporation, ResidueIncorporationDepth, Tt_EmergenceToMaturity
  ScrumCropInstance Grain Maize: HarvestIndex=0.5; MoistureContent=0.13; RootProportion=0.1; MaxRootDepth=1500; MaxHeight=1500; MaxCover=0.85; ExtinctionCoefficient=0.5; TypicalHarvestStage=Maturity; SeedlingNConc=0.05; ProductHarvestNConc=0.014; StoverHarvestNConc=0.007; RootNConc=0.009; BaseTemperature=5; OptimumTemperature=30; MaxTemperature=40; Tt_SowToEmergence=100; GSMax=0.005; R50=150; ConsiderWaterStress=true; Factor_XoBiomass=0.5; Factor_bBiomass=0.2; Factor_XoCover=0.4; Factor_bCover=0.2; Factor_XoHeight=0.7; Factor_bHeight=0.2
    zero: LegumeFactor, PlantingDepth, ExpectedYield, Tt_EstablishmentToHarvest, FieldLoss, ResidueRemoval, ResidueIncorporation, ResidueIncorporationDepth, Tt_EmergenceToMaturity
  ScrumCropInstance Vegetable Leek: HarvestIndex=0.9; MoistureContent=0.89; RootProportion=0.1; MaxRootDepth=600; MaxHeight=600; MaxCover=0.75; ExtinctionCoefficient=0.3; TypicalHarvestStage=Vegetative; SeedlingNConc=0.05; ProductHarvestNConc=0.02; StoverHarvestNConc=0.035; RootNConc=0.01; BaseTemperature=1; OptimumTemperature=25; MaxTemperature=35; Tt_SowToEmergence=100; GSMax=0.008; R50=150; ConsiderWaterStress=true; Factor_XoBiomass=0.5; Factor_bBiomass=0.2; Factor_XoCover=0.4; Factor_bCover=0.2; Factor_XoHeight=0.7; Factor_bHeight=0.2
    zero: LegumeFactor, PlantingDepth, ExpectedYield, Tt_EstablishmentToHarvest, FieldLoss, ResidueRemoval, ResidueIncorporation, ResidueIncorporationDepth, Tt_EmergenceToMaturity
  ScrumCropInstance Vegetable Onion: HarvestIndex=0.8; MoistureContent=0.89; RootProportion=0.1; MaxRootDepth=600; MaxHeight=400; MaxCover=0.8; ExtinctionCoefficient=0.3; TypicalHarvestStage=Maturity; SeedlingNConc=0.05; ProductHarvestNConc=0.014; StoverHarvestNConc=0.02; RootNConc=0.01; BaseTemperature=1; OptimumTemperature=25; MaxTemperature=35; Tt_SowToEmergence=100; GSMax=0.008; R50=150; ConsiderWaterStress=true; Factor_XoBiomass=0.5; Factor_bBiomass=0.2; Factor_XoCover=0.4; Factor_bCover=0.2; Factor_XoHeight=0.7; Factor_bHeight=0.2
    zero: LegumeFactor, PlantingDepth, ExpectedYield, Tt_EstablishmentToHarvest, FieldLoss, ResidueRemoval, ResidueIncorporation, ResidueIncorporationDepth, Tt_EmergenceToMaturity
  ScrumCropInstance Vegetable Spring onion: HarvestIndex=0.99; MoistureContent=0.95; RootProportion=0.1; MaxRootDepth=600; MaxHeight=400; MaxCover=0.75; ExtinctionCoefficient=0.3; TypicalHarvestStage=Vegetative; SeedlingNConc=0.05; ProductHarvestNConc=0.022; StoverHarvestNConc=0.022; RootNConc=0.01; BaseTemperature=1; OptimumTemperature=25; MaxTemperature=35; Tt_SowToEmergence=100; GSMax=0.008; R50=150; ConsiderWaterStress=true; Factor_XoBiomass=0.5; Factor_bBiomass=0.2; Factor_XoCover=0.4; Factor_bCover=0.2; Factor_XoHeight=0.7; Factor_bHeight=0.2
    zero: LegumeFactor, PlantingDepth, ExpectedYield, Tt_EstablishmentToHarvest, FieldLoss, ResidueRemoval, ResidueIncorporation, ResidueIncorporationDepth, Tt_EmergenceToMaturity
  ScrumCropInstance Vegetable Garlic: HarvestIndex=0.8; MoistureContent=0.9; RootProportion=0.1; MaxRootDepth=600; MaxHeight=400; MaxCover=0.7; ExtinctionCoefficient=0.3; TypicalHarvestStage=Vegetative; SeedlingNConc=0.05; ProductHarvestNConc=0.014; StoverHarvestNConc=0.02; RootNConc=0.01; BaseTemperature=1; OptimumTemperature=25; MaxTemperature=35; Tt_SowToEmergence=100; GSMax=0.008; R50=150; ConsiderWaterStress=true; Factor_XoBiomass=0.5; Factor_bBiomass=0.2; Factor_XoCover=0.4; Factor_bCover=0.2; Factor_XoHeight=0.7; Factor_bHeight=0.2
    zero: LegumeFactor, PlantingDepth, ExpectedYield, Tt_EstablishmentToHarvest, FieldLoss, ResidueRemoval, ResidueIncorporation, ResidueIncorporationDepth, Tt_EmergenceToMaturity
  ScrumCropInstance Vegetable Celery: HarvestIndex=0.85; MoistureContent=0.88; RootProportion=0.1; MaxRootDepth=1200; MaxHeight=500; MaxCover=0.97; ExtinctionCoefficient=0.4; TypicalHarvestStage=Vegetative; SeedlingNConc=0.05; ProductHarvestNConc=0.025; StoverHarvestNConc=0.025; RootNConc=0.009; BaseTemperature=1; OptimumTemperature=25; MaxTemperature=35; Tt_SowToEmergence=100; GSMax=0.008; R50=150; ConsiderWaterStress=true; Factor_XoBiomass=0.5; Factor_bBiomass=0.2; Factor_XoCover=0.4; Factor_bCover=0.2; Factor_XoHeight=0.7; Factor_bHeight=0.2
    zero: LegumeFactor, PlantingDepth, ExpectedYield, Tt_EstablishmentToHarvest, FieldLoss, ResidueRemoval, ResidueIncorporation, ResidueIncorporationDepth, Tt_EmergenceToMaturity
  ScrumCropInstance Vegetable Silver beet: HarvestIndex=0.8; MoistureContent=0.93; RootProportion=0.1; MaxRootDepth=1500; MaxHeight=500; MaxCover=0.76; ExtinctionCoefficient=0.5; TypicalHarvestStage=Vegetative; SeedlingNConc=0.05; ProductHarvestNConc=0.03; StoverHarvestNConc=0.025; RootNConc=0.008; BaseTemperature=1; OptimumTemperature=25; MaxTemperature=35; Tt_SowToEmergence=100; GSMax=0.008; R50=150; ConsiderWaterStress=true; Factor_XoBiomass=0.5; Factor_bBiomass=0.2; Factor_XoCover=0.4; Factor_bCover=0.2; Factor_XoHeight=0.7; Factor_bHeight=0.2
    zero: LegumeFactor, PlantingDepth, ExpectedYield, Tt_EstablishmentToHarvest, FieldLoss, ResidueRemoval, ResidueIncorporation, ResidueIncorporationDepth, Tt_EmergenceToMaturity
  ScrumCropInstance Vegetable Red beet: HarvestIndex=0.815; MoistureContent=0.86; RootProportion=0.1; MaxRootDepth=1500; MaxHeight=300; MaxCover=0.95; ExtinctionCoefficient=0.4; TypicalHarvestStage=EarlyReproductive; SeedlingNConc=0.05; ProductHarvestNConc=0.015; StoverHarvestNConc=0.02; RootNConc=0.008; BaseTemperature=1; OptimumTemperature=25; MaxTemperature=35; Tt_SowToEmergence=100; GSMax=0.008; R50=150; ConsiderWaterStress=true; Factor_XoBiomass=0.5; Factor_bBiomass=0.2; Factor_XoCover=0.4; Factor_bCover=0.2; Factor_XoHeight=0.7; Factor_bHeight=0.2
    zero: LegumeFactor, PlantingDepth, ExpectedYield, Tt_EstablishmentToHarvest, FieldLoss, ResidueRemoval, ResidueIncorporation, ResidueIncorporationDepth, Tt_EmergenceToMaturity
  ScrumCropInstance Vegetable Cauliflower: HarvestIndex=0.4; MoistureContent=0.93; RootProportion=0.1; MaxRootDepth=1200; MaxHeight=300; MaxCover=0.97; ExtinctionCoefficient=1; TypicalHarvestStage=EarlyReproductive; SeedlingNConc=0.05; ProductHarvestNConc=0.035; StoverHarvestNConc=0.038; RootNConc=0.008; BaseTemperature=1; OptimumTemperature=25; MaxTemperature=35; Tt_SowToEmergence=100; GSMax=0.008; R50=150; ConsiderWaterStress=true; Factor_XoBiomass=0.5; Factor_bBiomass=0.2; Factor_XoCover=0.4; Factor_bCover=0.2; Factor_XoHeight=0.7; Factor_bHeight=0.2
    zero: LegumeFactor, PlantingDepth, ExpectedYield, Tt_EstablishmentToHarvest, FieldLoss, ResidueRemoval, ResidueIncorporation, ResidueIncorporationDepth, Tt_EmergenceToMaturity
  ScrumCropInstance Vegetable Cabbage: HarvestIndex=0.7; MoistureContent=0.9; RootProportion=0.1; MaxRootDepth=1200; MaxHeight=300; MaxCover=0.97; ExtinctionCoefficient=1; TypicalHarvestStage=Vegetative; SeedlingNConc=0.05; ProductHarvestNConc=0.026; StoverHarvestNConc=0.03; RootNConc=0.008; BaseTemperature=1; OptimumTemperature=25; MaxTemperature=35; Tt_SowToEmergence=100; GSMax=0.008; R50=150; ConsiderWaterStress=true; Factor_XoBiomass=0.5; Factor_bBiomass=0.2; Factor_XoCover=0.4; Factor_bCover=0.2; Factor_XoHeight=0.7; Factor_bHeight=0.2
    zero: LegumeFactor, PlantingDepth, ExpectedYield, Tt_EstablishmentToHarvest, FieldLoss, ResidueRemoval, ResidueIncorporation, ResidueIncorporationDepth, Tt_EmergenceToMaturity
  ScrumCropInstance Vegetable Brussel sprout: HarvestIndex=0.4; MoistureContent=0.8; RootProportion=0.1; MaxRootDepth=1200; MaxHeight=800; MaxCover=0.97; ExtinctionCoefficient=1; TypicalHarvestStage=EarlyReproductive; SeedlingNConc=0.05; ProductHarvestNConc=0.035; StoverHarvestNConc=0.038; RootNConc=0.008; BaseTemperature=1; OptimumTemperature=25; MaxTemperature=35; Tt_SowToEmergence=100; GSMax=0.008; R50=150; ConsiderWaterStress=true; Factor_XoBiomass=0.5; Factor_bBiomass=0.2; Factor_XoCover=0.4; Factor_bCover=0.2; Factor_XoHeight=0.7; Factor_bHeight=0.2
    zero: LegumeFactor, PlantingDepth, ExpectedYield, Tt_EstablishmentToHarvest, FieldLoss, ResidueRemoval, ResidueIncorporation, ResidueIncorporationDepth, Tt_EmergenceToMaturity
  ScrumCropInstance Vegetable Broccoli: HarvestIndex=0.26; MoistureContent=0.89; RootProportion=0.1; MaxRootDepth=1200; MaxHeight=300; MaxCover=0.97; ExtinctionCoefficient=1; TypicalHarvestStage=EarlyReproductive; SeedlingNConc=0.05; ProductHarvestNConc=0.036; StoverHarvestNConc=0.036; RootNConc=0.008; BaseTemperature=1; OptimumTemperature=25; MaxTemperature=35; Tt_SowToEmergence=100; GSMax=0.008; R50=150; ConsiderWaterStress=true; Factor_XoBiomass=0.5; Factor_bBiomass=0.2; Factor_XoCover=0.4; Factor_bCover=0.2; Factor_XoHeight=0.7; Factor_bHeight=0.2
    zero: LegumeFactor, PlantingDepth, ExpectedYield, Tt_EstablishmentToHarvest, FieldLoss, ResidueRemoval, ResidueIncorporation, ResidueIncorporationDepth, Tt_EmergenceToMaturity
  ScrumCropInstance Vegetable Pak choi: HarvestIndex=0.63; MoistureContent=0.96; RootProportion=0.1; MaxRootDepth=1200; MaxHeight=300; MaxCover=0.8; ExtinctionCoefficient=0.75; TypicalHarvestStage=Vegetative; SeedlingNConc=0.05; ProductHarvestNConc=0.048; StoverHarvestNConc=0.045; RootNConc=0.008; BaseTemperature=1; OptimumTemperature=25; MaxTemperature=35; Tt_SowToEmergence=100; GSMax=0.008; R50=150; ConsiderWaterStress=true; Factor_XoBiomass=0.5; Factor_bBiomass=0.2; Factor_XoCover=0.4; Factor_bCover=0.2; Factor_XoHeight=0.7; Factor_bHeight=0.2
    zero: LegumeFactor, PlantingDepth, ExpectedYield, Tt_EstablishmentToHarvest, FieldLoss, ResidueRemoval, ResidueIncorporation, ResidueIncorporationDepth, Tt_EmergenceToMaturity
  ScrumCropInstance Vegetable Choy sum: HarvestIndex=0.85; MoistureContent=0.9; RootProportion=0.1; MaxRootDepth=1200; MaxHeight=300; MaxCover=0.9; ExtinctionCoefficient=1; TypicalHarvestStage=Vegetative; SeedlingNConc=0.05; ProductHarvestNConc=0.048; StoverHarvestNConc=0.045; RootNConc=0.008; BaseTemperature=1; OptimumTemperature=25; MaxTemperature=35; Tt_SowToEmergence=100; GSMax=0.008; R50=150; ConsiderWaterStress=true; Factor_XoBiomass=0.5; Factor_bBiomass=0.2; Factor_XoCover=0.4; Factor_bCover=0.2; Factor_XoHeight=0.7; Factor_bHeight=0.2
    zero: LegumeFactor, PlantingDepth, ExpectedYield, Tt_EstablishmentToHarvest, FieldLoss, ResidueRemoval, ResidueIncorporation, ResidueIncorporationDepth, Tt_EmergenceToMaturity
  ScrumCropInstance Vegetable Wong bok: HarvestIndex=0.8; MoistureContent=0.9; RootProportion=0.1; MaxRootDepth=1200; MaxHeight=400; MaxCover=0.9; ExtinctionCoefficient=1; TypicalHarvestStage=Vegetative; SeedlingNConc=0.05; ProductHarvestNConc=0.03; StoverHarvestNConc=0.03; RootNConc=0.008; BaseTemperature=1; OptimumTemperature=25; MaxTemperature=35; Tt_SowToEmergence=100; GSMax=0.008; R50=150; ConsiderWaterStress=true; Factor_XoBiomass=0.5; Factor_bBiomass=0.2; Factor_XoCover=0.4; Factor_bCover=0.2; Factor_XoHeight=0.7; Factor_bHeight=0.2
    zero: LegumeFactor, PlantingDepth, ExpectedYield, Tt_EstablishmentToHarvest, FieldLoss, ResidueRemoval, ResidueIncorporation, ResidueIncorporationDepth, Tt_EmergenceToMaturity
  ScrumCropInstance Vegetable Coriander: HarvestIndex=0.99; MoistureContent=0.95; RootProportion=0.1; MaxRootDepth=1200; MaxHeight=300; MaxCover=0.9; ExtinctionCoefficient=0.4; TypicalHarvestStage=Vegetative; SeedlingNConc=0.05; ProductHarvestNConc=0.047; StoverHarvestNConc=0.047; RootNConc=0.009; BaseTemperature=5; OptimumTemperature=30; MaxTemperature=40; Tt_SowToEmergence=100; GSMax=0.008; R50=150; ConsiderWaterStress=true; Factor_XoBiomass=0.5; Factor_bBiomass=0.2; Factor_XoCover=0.4; Factor_bCover=0.2; Factor_XoHeight=0.7; Factor_bHeight=0.2
    zero: LegumeFactor, PlantingDepth, ExpectedYield, Tt_EstablishmentToHarvest, FieldLoss, ResidueRemoval, ResidueIncorporation, ResidueIncorporationDepth, Tt_EmergenceToMaturity
  ScrumCropInstance Vegetable Squash: HarvestIndex=0.8; MoistureContent=0.8; RootProportion=0.1; MaxRootDepth=800; MaxHeight=400; MaxCover=0.94; ExtinctionCoefficient=0.5; TypicalHarvestStage=Maturity; SeedlingNConc=0.05; ProductHarvestNConc=0.02; StoverHarvestNConc=0.02; RootNConc=0.01; BaseTemperature=5; OptimumTemperature=30; MaxTemperature=40; Tt_SowToEmergence=100; GSMax=0.008; R50=150; ConsiderWaterStress=true; Factor_XoBiomass=0.5; Factor_bBiomass=0.2; Factor_XoCover=0.4; Factor_bCover=0.2; Factor_XoHeight=0.7; Factor_bHeight=0.2
    zero: LegumeFactor, PlantingDepth, ExpectedYield, Tt_EstablishmentToHarvest, FieldLoss, ResidueRemoval, ResidueIncorporation, ResidueIncorporationDepth, Tt_EmergenceToMaturity
  ScrumCropInstance Vegetable Pumpkin: HarvestIndex=0.8; MoistureContent=0.88; RootProportion=0.1; MaxRootDepth=800; MaxHeight=400; MaxCover=0.97; ExtinctionCoefficient=0.5; TypicalHarvestStage=LateReproductive; SeedlingNConc=0.05; ProductHarvestNConc=0.02; StoverHarvestNConc=0.014; RootNConc=0.01; BaseTemperature=5; OptimumTemperature=30; MaxTemperature=40; Tt_SowToEmergence=100; GSMax=0.008; R50=150; ConsiderWaterStress=true; Factor_XoBiomass=0.5; Factor_bBiomass=0.2; Factor_XoCover=0.4; Factor_bCover=0.2; Factor_XoHeight=0.7; Factor_bHeight=0.2
    zero: LegumeFactor, PlantingDepth, ExpectedYield, Tt_EstablishmentToHarvest, FieldLoss, ResidueRemoval, ResidueIncorporation, ResidueIncorporationDepth, Tt_EmergenceToMaturity
  ScrumCropInstance Vegetable Zucchini: HarvestIndex=0.4; MoistureContent=0.95; RootProportion=0.1; MaxRootDepth=800; MaxHeight=500; MaxCover=0.85; ExtinctionCoefficient=0.5; TypicalHarvestStage=EarlyReproductive; SeedlingNConc=0.05; ProductHarvestNConc=0.032; StoverHarvestNConc=0.038; RootNConc=0.01; BaseTemperature=5; OptimumTemperature=30; MaxTemperature=40; Tt_SowToEmergence=100; GSMax=0.008; R50=150; ConsiderWaterStress=true; Factor_XoBiomass=0.5; Factor_bBiomass=0.2; Factor_XoCover=0.4; Factor_bCover=0.2; Factor_XoHeight=0.7; Factor_bHeight=0.2
    zero: LegumeFactor, PlantingDepth, ExpectedYield, Tt_EstablishmentToHarvest, FieldLoss, ResidueRemoval, ResidueIncorporation, ResidueIncorporationDepth, Tt_EmergenceToMaturity
  ScrumCropInstance Vegetable Carrot: HarvestIndex=0.9; MoistureContent=0.88; RootProportion=0.1; MaxRootDepth=1200; MaxHeight=300; MaxCover=0.9; ExtinctionCoefficient=0.35; TypicalHarvestStage=EarlyReproductive; SeedlingNConc=0.05; ProductHarvestNConc=0.01; StoverHarvestNConc=0.02; RootNConc=0.009; BaseTemperature=1; OptimumTemperature=25; MaxTemperature=35; Tt_SowToEmergence=100; GSMax=0.008; R50=150; ConsiderWaterStress=true; Factor_XoBiomass=0.5; Factor_bBiomass=0.2; Factor_XoCover=0.4; Factor_bCover=0.2; Factor_XoHeight=0.7; Factor_bHeight=0.2
    zero: LegumeFactor, PlantingDepth, ExpectedYield, Tt_EstablishmentToHarvest, FieldLoss, ResidueRemoval, ResidueIncorporation, ResidueIncorporationDepth, Tt_EmergenceToMaturity
  ScrumCropInstance Vegetable Kumara: HarvestIndex=0.89; MoistureContent=0.774; RootProportion=0.1; MaxRootDepth=900; MaxHeight=400; MaxCover=0.97; ExtinctionCoefficient=0.5; TypicalHarvestStage=Maturity; SeedlingNConc=0.05; ProductHarvestNConc=0.018; StoverHarvestNConc=0.02; RootNConc=0.01; BaseTemperature=5; OptimumTemperature=30; MaxTemperature=40; Tt_SowToEmergence=100; GSMax=0.008; R50=150; ConsiderWaterStress=true; Factor_XoBiomass=0.5; Factor_bBiomass=0.2; Factor_XoCover=0.4; Factor_bCover=0.2; Factor_XoHeight=0.7; Factor_bHeight=0.2
    zero: LegumeFactor, PlantingDepth, ExpectedYield, Tt_EstablishmentToHarvest, FieldLoss, ResidueRemoval, ResidueIncorporation, ResidueIncorporationDepth, Tt_EmergenceToMaturity
  ScrumCropInstance Vegetable Lettuce Ice berg: HarvestIndex=0.7; MoistureContent=0.95; RootProportion=0.1; MaxRootDepth=1000; MaxHeight=300; MaxCover=0.95; ExtinctionCoefficient=0.5; TypicalHarvestStage=Vegetative; SeedlingNConc=0.05; ProductHarvestNConc=0.026; StoverHarvestNConc=0.03; RootNConc=0.009; BaseTemperature=1; OptimumTemperature=25; MaxTemperature=35; Tt_SowToEmergence=100; GSMax=0.008; R50=150; ConsiderWaterStress=true; Factor_XoBiomass=0.5; Factor_bBiomass=0.2; Factor_XoCover=0.4; Factor_bCover=0.2; Factor_XoHeight=0.7; Factor_bHeight=0.2
    zero: LegumeFactor, PlantingDepth, ExpectedYield, Tt_EstablishmentToHarvest, FieldLoss, ResidueRemoval, ResidueIncorporation, ResidueIncorporationDepth, Tt_EmergenceToMaturity
  ScrumCropInstance Vegetable Lettuce Leafy-salad: HarvestIndex=0.8; MoistureContent=0.95; RootProportion=0.1; MaxRootDepth=1000; MaxHeight=300; MaxCover=0.9; ExtinctionCoefficient=0.5; TypicalHarvestStage=Vegetative; SeedlingNConc=0.05; ProductHarvestNConc=0.035; StoverHarvestNConc=0.03; RootNConc=0.009; BaseTemperature=1; OptimumTemperature=25; MaxTemperature=35; Tt_SowToEmergence=100; GSMax=0.008; R50=150; ConsiderWaterStress=true; Factor_XoBiomass=0.5; Factor_bBiomass=0.2; Factor_XoCover=0.4; Factor_bCover=0.2; Factor_XoHeight=0.7; Factor_bHeight=0.2
    zero: LegumeFactor, PlantingDepth, ExpectedYield, Tt_EstablishmentToHarvest, FieldLoss, ResidueRemoval, ResidueIncorporation, ResidueIncorporationDepth, Tt_EmergenceToMaturity
  ScrumCropInstance Vegetable Parsnip: HarvestIndex=0.95; MoistureContent=0.83; RootProportion=0.1; MaxRootDepth=1200; MaxHeight=300; MaxCover=0.95; ExtinctionCoefficient=0.4; TypicalHarvestStage=EarlyReproductive; SeedlingNConc=0.05; ProductHarvestNConc=0.0135; StoverHarvestNConc=0.02; RootNConc=0.009; BaseTemperature=1; OptimumTemperature=25; MaxTemperature=35; Tt_SowToEmergence=100; GSMax=0.008; R50=150; ConsiderWaterStress=true; Factor_XoBiomass=0.5; Factor_bBiomass=0.2; Factor_XoCover=0.4; Factor_bCover=0.2; Factor_XoHeight=0.7; Factor_bHeight=0.2
    zero: LegumeFactor, PlantingDepth, ExpectedYield, Tt_EstablishmentToHarvest, FieldLoss, ResidueRemoval, ResidueIncorporation, ResidueIncorporationDepth, Tt_EmergenceToMaturity
  ScrumCropInstance Vegetable Bean: HarvestIndex=0.44; MoistureContent=0.89; RootProportion=0.1; MaxRootDepth=1000; MaxHeight=400; MaxCover=0.9; ExtinctionCoefficient=0.5; TypicalHarvestStage=EarlyReproductive; SeedlingNConc=0.05; ProductHarvestNConc=0.028; StoverHarvestNConc=0.025; RootNConc=0.015; LegumeFactor=1; BaseTemperature=5; OptimumTemperature=30; MaxTemperature=40; Tt_SowToEmergence=100; GSMax=0.008; R50=150; ConsiderWaterStress=true; PlantingDepth=0; ExpectedYield=0; Tt_EstablishmentToHarvest=0; FieldLoss=0; ResidueRemoval=0; ResidueIncorporation=0; ResidueIncorporationDepth=0; Factor_XoBiomass=0.5; Factor_bBiomass=0.2; Factor_XoCover=0.4; Factor_bCover=0.2; Factor_XoHeight=0.7; Factor_bHeight=0.2; Tt_EmergenceToMaturity=0
  ScrumCropInstance Vegetable Pea: HarvestIndex=0.34; MoistureContent=0.73; RootProportion=0.1; MaxRootDepth=700; MaxHeight=400; MaxCover=0.97; ExtinctionCoefficient=0.5; TypicalHarvestStage=EarlyReproductive; SeedlingNConc=0.05; ProductHarvestNConc=0.04; StoverHarvestNConc=0.021; RootNConc=0.015; LegumeFactor=1; BaseTemperature=5; OptimumTemperature=30; MaxTemperature=40; Tt_SowToEmergence=100; GSMax=0.008; R50=150; ConsiderWaterStress=true; PlantingDepth=0; ExpectedYield=0; Tt_EstablishmentToHarvest=0; FieldLoss=0; ResidueRemoval=0; ResidueIncorporation=0; ResidueIncorporationDepth=0; Factor_XoBiomass=0.5; Factor_bBiomass=0.2; Factor_XoCover=0.4; Factor_bCover=0.2; Factor_XoHeight=0.7; Factor_bHeight=0.2; Tt_EmergenceToMaturity=0
  ScrumCropInstance Vegetable Tomato: HarvestIndex=0.5; MoistureContent=0.95; RootProportion=0.1; MaxRootDepth=600; MaxHeight=600; MaxCover=0.97; ExtinctionCoefficient=0.6; TypicalHarvestStage=LateReproductive; SeedlingNConc=0.05; ProductHarvestNConc=0.02; StoverHarvestNConc=0.02; RootNConc=0.009; BaseTemperature=5; OptimumTemperature=30; MaxTemperature=40; Tt_SowToEmergence=100; GSMax=0.008; R50=150; ConsiderWaterStress=true; Factor_XoBiomass=0.5; Factor_bBiomass=0.2; Factor_XoCover=0.4; Factor_bCover=0.2; Factor_XoHeight=0.7; Factor_bHeight=0.2
    zero: LegumeFactor, PlantingDepth, ExpectedYield, Tt_EstablishmentToHarvest, FieldLoss, ResidueRemoval, ResidueIncorporation, ResidueIncorporationDepth, Tt_EmergenceToMaturity
  ScrumCropInstance Vegetable Potato: HarvestIndex=0.9; MoistureContent=0.777; RootProportion=0.1; MaxRootDepth=600; MaxHeight=400; MaxCover=0.97; ExtinctionCoefficient=0.6; TypicalHarvestStage=LateReproductive; SeedlingNConc=0.05; ProductHarvestNConc=0.018; StoverHarvestNConc=0.02; RootNConc=0.009; BaseTemperature=1; OptimumTemperature=25; MaxTemperature=35; Tt_SowToEmergence=100; GSMax=0.008; R50=150; ConsiderWaterStress=true; Factor_XoBiomass=0.5; Factor_bBiomass=0.2; Factor_XoCover=0.4; Factor_bCover=0.2; Factor_XoHeight=0.7; Factor_bHeight=0.2
    zero: LegumeFactor, PlantingDepth, ExpectedYield, Tt_EstablishmentToHarvest, FieldLoss, ResidueRemoval, ResidueIncorporation, ResidueIncorporationDepth, Tt_EmergenceToMaturity
  ScrumCropInstance Vegetable Spinach: HarvestIndex=0.7; MoistureContent=0.92; RootProportion=0.1; MaxRootDepth=1500; MaxHeight=300; MaxCover=0.8; ExtinctionCoefficient=0.5; TypicalHarvestStage=Vegetative; SeedlingNConc=0.05; ProductHarvestNConc=0.045; StoverHarvestNConc=0.04; RootNConc=0.008; BaseTemperature=1; OptimumTemperature=25; MaxTemperature=35; Tt_SowToEmergence=100; GSMax=0.008; R50=150; ConsiderWaterStress=true; Factor_XoBiomass=0.5; Factor_bBiomass=0.2; Factor_XoCover=0.4; Factor_bCover=0.2; Factor_XoHeight=0.7; Factor_bHeight=0.2
    zero: LegumeFactor, PlantingDepth, ExpectedYield, Tt_EstablishmentToHarvest, FieldLoss, ResidueRemoval, ResidueIncorporation, ResidueIncorporationDepth, Tt_EmergenceToMaturity
  ScrumCropInstance Vegetable Broad bean: HarvestIndex=0.3; MoistureContent=0.76; RootProportion=0.1; MaxRootDepth=1000; MaxHeight=700; MaxCover=0.9; ExtinctionCoefficient=0.5; TypicalHarvestStage=EarlyReproductive; SeedlingNConc=0.05; ProductHarvestNConc=0.044; StoverHarvestNConc=0.017; RootNConc=0.015; LegumeFactor=1; BaseTemperature=5; OptimumTemperature=30; MaxTemperature=40; Tt_SowToEmergence=100; GSMax=0.008; R50=150; ConsiderWaterStress=true; PlantingDepth=0; ExpectedYield=0; Tt_EstablishmentToHarvest=0; FieldLoss=0; ResidueRemoval=0; ResidueIncorporation=0; ResidueIncorporationDepth=0; Factor_XoBiomass=0.5; Factor_bBiomass=0.2; Factor_XoCover=0.4; Factor_bCover=0.2; Factor_XoHeight=0.7; Factor_bHeight=0.2; Tt_EmergenceToMaturity=0
  ScrumCropInstance Vegetable Sweetcorn: HarvestIndex=0.48; MoistureContent=0.78; RootProportion=0.1; MaxRootDepth=1500; MaxHeight=900; MaxCover=0.75; ExtinctionCoefficient=0.5; TypicalHarvestStage=MidReproductive; SeedlingNConc=0.05; ProductHarvestNConc=0.014; StoverHarvestNConc=0.009; RootNConc=0.009; BaseTemperature=5; OptimumTemperature=30; MaxTemperature=40; Tt_SowToEmergence=100; GSMax=0.005; R50=150; ConsiderWaterStress=true; Factor_XoBiomass=0.5; Factor_bBiomass=0.2; Factor_XoCover=0.4; Factor_bCover=0.2; Factor_XoHeight=0.7; Factor_bHeight=0.2
    zero: LegumeFactor, PlantingDepth, ExpectedYield, Tt_EstablishmentToHarvest, FieldLoss, ResidueRemoval, ResidueIncorporation, ResidueIncorporationDepth, Tt_EmergenceToMaturity
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