Simulations: Version=195
  DataStore
  Simulation BasicSimulation
    Memo Description
      In this example SPRUM is set to have a FullCanopy duration of 0 which means it grazes and rewinds its self after accumulating 300 degree days from the start of regrowth.  The amout of biomass removed each time SPRUM self grazes is specified in the OnCut BiomassRemovalEvent object
    Weather: FileName=%root%/Examples/WeatherFiles/NZ_Lincoln
    Clock: Start=1999-08-01; End=2000-08-01
    Summary
    SoilArbitrator Soil Arbitrator
    Zone Field: Area=1; Slope=0; AspectAngle=0; Altitude=50
      MicroClimate: a_interception=0; b_interception=1; c_interception=0; d_interception=0; SoilHeatFluxFraction=0.4; MinimumHeightDiffForNewLayer=0; NightInterceptionFraction=0.5; ReferenceHeight=2
      Soil: SoilType=Generic soil; Country=New Zealand; Latitude=37.5; Longitude=172.5
        Chemical: Thickness=[300, 300, 300, 300, 300, 300, 200]; PH=[6, 6, 6, 6, 6, 6, 6]; PHUnits=Water
        Physical
          Thickness  ParticleSizeSand  ParticleSizeSilt  ParticleSizeClay  BD  AirDry  LL15  DUL   SAT  KS
          300        20                60                20                1   0.09    0.15  0.35  0.5  500
          300        20                60                20                1   0.09    0.15  0.35  0.5  500
          300        20                60                20                1   0.09    0.15  0.35  0.5  500
          300        20                60                20                1   0.09    0.15  0.35  0.5  500
          300        20                60                20                1   0.09    0.15  0.35  0.5  500
          300        20                60                20                1   0.09    0.15  0.35  0.5  500
          200        20                60                20                1   0.09    0.15  0.35  0.5  500
          SoilCrop SPRUMSoil: LL=[0.15, 0.15, 0.15, 0.15, 0.15, 0.15, 0.15]; KL=[0.08, 0.08, 0.08, 0.08, 0.08, 0.08, 0.08]; XF=[1, 1, 1, 1, 1, 1, 1]
        WaterBalance SoilWater: SummerDate=1-Oct; SummerU=8; SummerCona=4; WinterDate=1-Apr; WinterU=4; WinterCona=1.5; DiffusConst=0; DiffusSlope=0; Salb=0.2; CN2Bare=60; CNRed=10; CNCov=0.8; DischargeWidth=0; CatchmentArea=0; PSIDul=-100; Thickness=[150, 150, 300, 300, 300, 300, 300, 200]; SWCON=[0.5, 0.5, 0.43, 0.375, 0.34, 0.35, 0.4, 0.48]
        Nutrient
        Organic: FOMCNRatio=30; CarbonUnits=Total
          Thickness  Carbon  SoilCNRatio  FBiom  FInert  FOM
          100        2       11.5         0.025  0.3     1243.931
          200        1.8     11.5         0.025  0.4     833.832
          300        1.5     11.5         0.015  0.6     457.617
          300        1       11.5         0      1       0
          300        1       11.5         0      1       0
          300        1       11.5         0      1       0
        Water: Thickness=[300, 300, 300, 300, 300, 300, 200]; InitialValues=[0.35, 0.35, 0.35, 0.35, 0.35, 0.35, 0.35]; InitialPAWmm=400; RelativeTo=LL15; FilledFromTop=true
        Solute NO3: Thickness=[300, 300, 300, 300, 300, 300, 200]; InitialValues=[0, 0, 0, 0, 0, 0, 0]; InitialValuesUnits=ppm; WaterTableConcentration=0; D0=0; DepthConstant=0; MaxDepthSoluteAccessible=0; RunoffEffectivenessAtMovingSolute=0; MaxEffectiveRunoff=0
        Solute NH4: same as BasicSimulation.Field.Soil.NO3
        Solute Urea: Thickness=[300, 300, 300, 300, 300, 300, 200]; InitialValues=[0, 0, 0, 0, 0, 0, 0]; InitialValuesUnits=kg/ha; WaterTableConcentration=0; D0=0; DepthConstant=0; MaxDepthSoluteAccessible=0; RunoffEffectivenessAtMovingSolute=0; MaxEffectiveRunoff=0
        SoilTemperature Temperature
      SurfaceOrganicMatter surface organic matter: InitialResidueName=wheat; InitialResidueType=wheat; InitialResidueMass=2000; InitialStandingFraction=0; InitialCPR=0; InitialCNR=80
      Irrigation
      Fertiliser
      Report: EventNames=[Clock].DoReport
        VariableNames:
          [Clock].Today
          [SPRUM].DaysAfterSowing
          [SPRUM].Phenology.CurrentPhaseName
          [SPRUM].Phenology.Stage
          [SPRUM].Residue.Wt
          [Phenology].AccumulatedTT
          [SPRUM].Total.Wt
          [SPRUM].Total.N
          [SPRUM].Root.Depth
          [SPRUM].Leaf.CoverGreen
          [SPRUM].Leaf.Wt
          [SPRUM].Root.Wt
      Plant SPRUM
      Manager AutomaticIrrigation
        Irrigation_Yes_No = yes
        Season_Start = 1-Oct
        Season_End = 30-Apr
        Season_Allocation = 1000
        Refull_Frac = 0.9
        Trigger_Frac = 0.7
        Return_days = 3
        Maximum_Irrigation_Amount = 40
        Top_Depth = 600
```csharp
using Newtonsoft.Json;
using Models.PMF.Phen;
using Models.Soils.Nutrients;
using System;
using Models.Core;
using Models.PMF;
using Models.Soils;
using System.Xml.Serialization;
using APSIM.Shared.Utilities;
using Models.PMF.Organs;
using Models.Interfaces;

        
namespace Models
{
   [Serializable] 
   [System.Xml.Serialization.XmlInclude(typeof(Model))]
    public class Script : Model
    {      
        [Link] private ISummary summary;
        [Link] private Irrigation Irrigation;
        [Link] private Clock Clock;
        [Link] private Soil Soil;
        [Link] private Plant SPRUM;
        [Link(Type = LinkType.Path, Path = "[SPRUM].Root")]
        private Root root;
        [Link(Type = LinkType.Path, Path = "[SPRUM].Phenology")]
        private Phenology phenology;
        [Link]
        private IPhysical soilPhysical;
        [Link]
        private ISoilWater waterBalance;
       //Communication to other modules
       
       //User inputs from properties tab
       [Description("Irrigation on (yes or no)")]
       public string Irrigation_Yes_No { get; set; }
       [Description("SeasonStart (dd-MMM)")]
       public string Season_Start { get; set; }
       [Description("SeasonEnd (dd-MMM)")]
       public string Season_End { get; set; }
       [Description("Season Allocation (mm)")]
       public double Season_Allocation { get; set; }
       [Description("% PAWC to refill soil to (0-1)")]
       public double Refull_Frac { get; set; }
       [Description("% PAWC to trigger irrigation (0-1)")]
       public double Trigger_Frac { get; set; }
       [Description("Minimum days for irrigation to return")]
       public double Return_days { get; set; }
       [Description("Maximum irrigation application (mm)")]
       public double Maximum_Irrigation_Amount { get; set; }
       [Description("Depth to calculate PAWC (mm)")]
       public double Top_Depth { get; set; }
       
       //Class members
       [JsonIgnore] private bool IrrigationIsAvailable { get; set; }
       [JsonIgnore] public bool SeasonIsOpen { get; set; }
       [JsonIgnore] private bool CropIsActive { get; set; }
       [JsonIgnore] private bool IrrigatorIsAvailable { get; set; }
       [JsonIgnore] private bool SoilIsDry { get; set; }
       [JsonIgnore] public double Top_DUL { get; set; }
       [JsonIgnore] public double Top_Refull { get; set; }
       [JsonIgnore] public double Top_Trigger { get; set; }
       [JsonIgnore] public double Top_LL { get; set; }
       [JsonIgnore] public double Top_SW { get; set; }
       [JsonIgnore] public double Accumulated_depth { get; set; }   
       [JsonIgnore] public double Days_since_irrigation { get; set; }
       [JsonIgnore] public double Amount_to_apply { get; set; }
       [JsonIgnore] public double Season_Application { get; set; }
        
       //Variables for date logic testing
       [JsonIgnore] public string StartString {get; set;}
       [JsonIgnore] public string EndString {get; set;}
       [JsonIgnore] public DateTime StartDate {get; set;}
       [JsonIgnore] public DateTime EndDate {get; set;}
       [JsonIgnore] public int TodayYear {get; set;}
       [JsonIgnore] public int TodayMonth {get; set;}
       [JsonIgnore] public int StartMonth {get; set;}
       [JsonIgnore] public int EndMonth {get; set;}
       [JsonIgnore] public int TodayDay {get; set;}
       [JsonIgnore] public int StartDay {get; set;}
       [JsonIgnore] public int EndDay {get; set;}
       
    
       //Calculate static soil variables
       [EventSubscribe("StartOfSimulation")]
       private void OnStartOfSimulation(object sender, EventArgs e)
       {   
          //Calculated soil water variables
          Accumulated_depth = 0;
          for (int layer = 0; Accumulated_depth < Top_Depth; layer++)
          {
             Top_LL += soilPhysical.LL15mm[layer];
             Top_DUL += soilPhysical.DULmm[layer];
             Accumulated_depth += soilPhysical.Thickness[layer];
          }
          Top_Refull = Top_LL + (Top_DUL - Top_LL) * Refull_Frac;
       }
       
      
       //Determine daily requirement for irrigation
        [EventSubscribe("StartOfDay")]
           private void OnStartOfDay(object sender, EventArgs e)
           { 
          //Can we irrigate?
          IrrigationIsAvailable = false; 
          if (Irrigation_Yes_No == "yes")
             IrrigationIsAvailable = true; 
    
          //Are we Allowed to Irrigate?
          TodayYear = Clock.Today.Year;
          StartString = Season_Start + "-" + TodayYear.ToString();
          EndString = Season_End + "-" + TodayYear.ToString();
          StartDate = DateTime.Parse(StartString);
          EndDate = DateTime.Parse(EndString);
          TodayMonth = Clock.Today.Month;
          TodayDay = Clock.Today.Day;
          StartDay = StartDate.Day;
          StartMonth = StartDate.Month;
          EndDay = EndDate.Day;
          EndMonth = EndDate.Month;
          
          SeasonIsOpen = false;
          //if we are in the spring and after the start date then yes
          if((Clock.Today.Month > 6) && (Clock.Today >= StartDate))
          SeasonIsOpen = true;
          //if we are in the autumn and before the end date then yes
          if((Clock.Today.Month <= 6) && (Clock.Today <= EndDate))
          SeasonIsOpen = true;
          
          //Is there a crop in the ground that needs irrigation?
          CropIsActive = false;
          if ((phenology.Stage >= 3.0) && (phenology.Stage < 6.0))
                CropIsActive = true;
          
          //Is the irrigator available?
          IrrigatorIsAvailable = false;
          Days_since_irrigation += 1;
          if (Days_since_irrigation >= Return_days)
             IrrigatorIsAvailable = true;
          
          //Is the soil dry enough to require irrigation?
          SoilIsDry = false;
          double CurrentRootDepth = 0;
          double RootDepth = root.Depth;
          CurrentRootDepth = Math.Max(RootDepth, CurrentRootDepth);
          
          double RelativeRootDepth = Math.Min(1.0, CurrentRootDepth / Top_Depth);
          Top_Trigger = Math.Min(Top_Refull, Top_DUL - (Top_DUL - Top_LL) * RelativeRootDepth * (1-Trigger_Frac)); 
          
          Accumulated_depth = 0;
          Top_SW = 0;
          for (int layer = 0; Accumulated_depth < Top_Depth; layer++)
          {
             Top_SW += waterBalance.SWmm[layer];
             Accumulated_depth += soilPhysical.Thickness[layer];
          }
          if (Top_SW <= Top_Trigger)
             SoilIsDry = true;
                
          //Lets bloody well irrigate then!!!!
          if((IrrigationIsAvailable) && (SeasonIsOpen) && (CropIsActive) && (IrrigatorIsAvailable) && (SoilIsDry)) //The conditions are rife for irrigation
          {
             Amount_to_apply = Math.Min(Top_Refull - Top_SW, Maximum_Irrigation_Amount);
             Amount_to_apply = Math.Min(Amount_to_apply, Season_Allocation - Season_Application); 
             Amount_to_apply = Math.Max(Amount_to_apply, 0.0);
             Irrigation.Apply(Amount_to_apply);
             Days_since_irrigation = 0;
             Season_Application += Amount_to_apply;
             summary.WriteMessage(this, "Automatic Irrigation", MessageType.Diagnostic);
            
          }
       }
    }
}
```
      Manager ApplyFertOnDates
        FertiliserType = NO3N
        FertiliserDates = 1-Aug, 15-Aug, 1-Sep, 15-Sep, 1-Nov, 15-Nov, 1-dec, 15-dec, 1-Jan, 15-Jan, 1-Feb, 15-Feb, 1-Mar, 15-Mar
        Amount = 0
        AmountType = False
```csharp
using Models.Soils;
using System;
using Models.Core;
using Models.PMF;
using APSIM.Shared.Utilities;
namespace Models
{
    [Serializable]
    public class Script : Model
    {
        [Link] Clock Clock;
        [Link] Fertiliser Fertiliser;
        
        [Separator("A component to apply fertiliser on one or more dates on every year of the simulation")]

        [Description("Type of fertiliser to apply? ")] 
        [Display(Type = DisplayType.FertiliserType)]public string FertiliserType { get; set; }

        [Description("Enter the fertilisation dates as dd-mmm with comma separation (any year information entered will be ignored): ")] 
        public string[] FertiliserDates { get; set; } 

        [Description("Amount of fertiliser to be applied (kg /ha)")] 
        public double Amount { get; set; }

        [Description("Is the above amount to be applied each time? (yes/ticked)? Or is it the total annual amount across all dates (no/unticked)")] 
        public bool AmountType { get; set; }
        
        [EventSubscribe("DoManagement")]
        private void OnDoManagement(object sender, EventArgs e)
        {
            foreach (string ddMMM in FertiliserDates)
            {
                if (DateUtilities.DatesEqual(ddMMM, Clock.Today))
                {
                    if (AmountType)
                        Fertiliser.Apply(amount: Amount, type: FertiliserType);
                    else
                        Fertiliser.Apply(amount: Amount / FertiliserDates.Length, type: FertiliserType);
                }
            }
        }
    }
}
```
      SprumPastureInstance BasePasture: AgeAtSimulationStart=1; YearsToMaxDimension=1; RUE=1; Presidue=0.15; RsenRate=0.01; Proot=0.1; PSBaseT=5; PSLOptT=20; PSUOptT=25; PSMaxT=35; GRINZ=false; MaxRD=600; MaxHeight=300; MaxPrunedHeight=100; MaxCover=0.97; MinCover=0.1; ExtinctCoeff=0.7; RegrowthDuration=300; FullCanopyDuration=0; BaseT=5; OptT=25; MaxT=35; RootNConc=0.01; LeafNConc=0.05; ResidueNConc=0.01; LegumePropn=1; GSMax=0.006; R50=120; WaterStress=false
      BiomassRemovalEvents OnCut: NameOfPlantToRemoveFrom=SPRUM; RemovalType=0; StageToSet=StartRegrowth
        BiomassRemovalFractions:
          PlantName  OrganName  TypeString  LiveToRemove  DeadToRemove  LiveToResidue  DeadToResidue
          SPRUM      Residue    Cutting     0             0             0              0
          SPRUM      Leaf       Cutting     0.7           0             0.25           0.5
          SPRUM      Nodule     Cutting     0             0             0              0
          SPRUM      Root       Cutting     0             0             0              0
  Simulation GrazingFromBiomassRemovalEvents
    Memo Description
      In this example SPRUM is set to have a very long FullCanopy duration so it does not reach the end of this phase and triger its own grazing.  Instead grazing dates are specifed in the BiomassRemovalEvents object named "OnCut"
    Weather: FileName=%root%/Examples/WeatherFiles/NZ_Lincoln
    Clock: Start=1999-08-01; End=2000-08-01
    Summary
    SoilArbitrator Soil Arbitrator
    Zone Field: Area=1; Slope=0; AspectAngle=0; Altitude=50
      MicroClimate: a_interception=0; b_interception=1; c_interception=0; d_interception=0; SoilHeatFluxFraction=0.4; MinimumHeightDiffForNewLayer=0; NightInterceptionFraction=0.5; ReferenceHeight=2
      Soil: same as BasicSimulation.Field.Soil
      SurfaceOrganicMatter surface organic matter: InitialResidueName=wheat; InitialResidueType=wheat; InitialResidueMass=2000; InitialStandingFraction=0; InitialCPR=0; InitialCNR=80
      Irrigation
      Fertiliser
      Report: same as BasicSimulation.Field.Report
      Plant SPRUM
      Manager AutomaticIrrigation: same as BasicSimulation.Field.AutomaticIrrigation
      Manager ApplyFertOnDates: same as BasicSimulation.Field.ApplyFertOnDates
      SprumPastureInstance BasePasture: AgeAtSimulationStart=1; YearsToMaxDimension=1; RUE=1; Presidue=0.15; RsenRate=0.01; Proot=0.1; PSBaseT=5; PSLOptT=20; PSUOptT=25; PSMaxT=35; GRINZ=false; MaxRD=600; MaxHeight=300; MaxPrunedHeight=100; MaxCover=0.97; MinCover=0.1; ExtinctCoeff=0.7; RegrowthDuration=300; FullCanopyDuration=10000; BaseT=5; OptT=25; MaxT=35; RootNConc=0.01; LeafNConc=0.05; ResidueNConc=0.01; LegumePropn=1; GSMax=0.006; R50=120; WaterStress=false
      BiomassRemovalEvents OnCut: NameOfPlantToRemoveFrom=SPRUM; RemovalType=0; StageToSet=StartRegrowth; RemovalDates=[1-12-1999, 20/2/2000, 2000-4-15]
        BiomassRemovalFractions:
          PlantName  OrganName  TypeString  LiveToRemove  DeadToRemove  LiveToResidue  DeadToResidue
          SPRUM      Residue    Cutting     0             0             0              0
          SPRUM      Leaf       Cutting     0.7           0             0.25           0.5
          SPRUM      Nodule     Cutting     0             0             0              0
          SPRUM      Root       Cutting     0             0             0              0
  Experiment PotentialYieldTest
    Memo Description
      In this example we set up an experment using SPRUM to examin the effects of different potentil growth rates and fertiliser supply rates on pasture growth and soil nitrogen variables
    Factors
      Permutation
        Factor PotentialYield
          CompositeFactor Low: Specifications=[BasePasture].RUE = 0.5
          CompositeFactor Mid: Specifications=[BasePasture].RUE = 0.75
          CompositeFactor High: Specifications=[BasePasture].RUE = 1.0
        Factor NReplacement
          CompositeFactor 100kgN: Specifications=[ApplyFertOnDates].Script.Amount = 100
          CompositeFactor 300kgN: Specifications=[ApplyFertOnDates].Script.Amount = 300
          CompositeFactor 600kgN: Specifications=[ApplyFertOnDates].Script.Amount = 600
    Simulation CropCompBase
      Weather: FileName=%root%/Examples/WeatherFiles/NZ_Lincoln
      Clock: Start=1999-08-01; End=2000-08-01
      Summary
      SoilArbitrator Soil Arbitrator
      Zone Field: Area=1; Slope=0; AspectAngle=0; Altitude=50
        MicroClimate: a_interception=0; b_interception=1; c_interception=0; d_interception=0; SoilHeatFluxFraction=0.4; MinimumHeightDiffForNewLayer=0; NightInterceptionFraction=0.5; ReferenceHeight=2
        Soil: same as BasicSimulation.Field.Soil
        SurfaceOrganicMatter surface organic matter: InitialResidueName=wheat; InitialResidueType=wheat; InitialResidueMass=2000; InitialStandingFraction=0; InitialCPR=0; InitialCNR=80
        Irrigation
        Fertiliser
        Report: EventNames=[Clock].DoReport
          VariableNames:
            [Clock].Today
            [SPRUM].IsAlive
            [SPRUM].DaysAfterSowing
            [SPRUM].Phenology.CurrentPhaseName
            [SPRUM].Phenology.Stage
            [SPRUM].Residue.Wt
            [Phenology].AccumulatedTT
            [SPRUM].Total.Wt
            [SPRUM].Total.N
            [SPRUM].Leaf.Photosynthesis
            [SPRUM].Leaf.Transpiration
            [SPRUM].Root.Depth
            [SPRUM].Leaf.CoverGreen
            [SPRUM].Leaf.LAI
            [SPRUM].Height
            [SPRUM].Leaf.Wt
            [SPRUM].Root.NUptake
            [SPRUM].Root.Wt
            [SPRUM].Root.NUptakeLayered
            [Fertiliser].NitrogenApplied
            [Soil].Water.MM
            [Soil].Nutrient.MineralN
            [Soil].Nutrient.MineralisedN
            [NO3].Flow
        Manager AutomaticIrrigation: same as BasicSimulation.Field.AutomaticIrrigation
        Manager ApplyFertOnDates: same as BasicSimulation.Field.ApplyFertOnDates
        Plant SPRUM
        SprumPastureInstance BasePasture: AgeAtSimulationStart=1; YearsToMaxDimension=1; RUE=1; Presidue=0.15; RsenRate=0.01; Proot=0.1; PSBaseT=5; PSLOptT=20; PSUOptT=25; PSMaxT=35; GRINZ=false; MaxRD=600; MaxHeight=300; MaxPrunedHeight=100; MaxCover=0.97; MinCover=0.5; ExtinctCoeff=0.7; RegrowthDuration=300; FullCanopyDuration=0; BaseT=5; OptT=25; MaxT=35; RootNConc=0.01; LeafNConc=0.05; ResidueNConc=0.01; LegumePropn=0; GSMax=0.006; R50=120; WaterStress=false
        BiomassRemovalEvents OnCut: NameOfPlantToRemoveFrom=SPRUM; RemovalType=0
          BiomassRemovalFractions:
            PlantName  OrganName  TypeString  LiveToRemove  DeadToRemove  LiveToResidue  DeadToResidue
            SPRUM      Residue    Cutting     0             0             0.5            0.5
            SPRUM      Leaf       Cutting     1             1             0              0
            SPRUM      Nodule     Cutting     0             0             0              0
            SPRUM      Root       Cutting     0             0             0              0
  Experiment NFixationTest
    Memo Description
      In this example we use SPRUM in an experiment to compare the effects of different legume contents on pasture production
    Factors
      Permutation
        Factor PotentialYield: same as PotentialYieldTest.Factors.Permutation.PotentialYield
        Factor Legume
          CompositeFactor Legume: Specifications=[BasePasture].LegumePropn = 1.0
          CompositeFactor Mix: Specifications=[BasePasture].LegumePropn = 0.2
          CompositeFactor Grass: Specifications=[BasePasture].LegumePropn = 0.0
    Simulation LegCompBase
      Weather: FileName=%root%/Examples/WeatherFiles/NZ_Lincoln
      Clock: Start=1999-08-01; End=2000-08-01
      Summary
      SoilArbitrator Soil Arbitrator
      Zone Field: Area=1; Slope=0; AspectAngle=0; Altitude=50
        MicroClimate: a_interception=0; b_interception=1; c_interception=0; d_interception=0; SoilHeatFluxFraction=0.4; MinimumHeightDiffForNewLayer=0; NightInterceptionFraction=0.5; ReferenceHeight=2
        Soil: same as BasicSimulation.Field.Soil
        SurfaceOrganicMatter surface organic matter: InitialResidueName=wheat; InitialResidueType=wheat; InitialResidueMass=2000; InitialStandingFraction=0; InitialCPR=0; InitialCNR=80
        Irrigation
        Fertiliser
        Report: EventNames=[Clock].DoReport
          VariableNames:
            [Clock].Today
            [SPRUM].IsAlive
            [SPRUM].DaysAfterSowing
            [SPRUM].Phenology.CurrentPhaseName
            [SPRUM].Phenology.Stage
            [SPRUM].Phenology.Age.YearDecimal
            [SPRUM].Residue.Wt
            [Phenology].AccumulatedTT
            [SPRUM].Total.Wt
            [SPRUM].Total.N
            [SPRUM].Leaf.Photosynthesis
            [SPRUM].Leaf.Transpiration
            [SPRUM].Root.Depth
            [SPRUM].Leaf.CoverGreen
            [SPRUM].Leaf.LAI
            [SPRUM].Height
            [SPRUM].Leaf.Wt
            [SPRUM].Root.NUptake
            [SPRUM].Root.Wt
            [SPRUM].Root.NUptakeLayered
            [Fertiliser].NitrogenApplied
            [Soil].Water.MM
            [Soil].Nutrient.MineralN
            [Soil].Nutrient.MineralisedN
            [NO3].Flow
            [SowAndHarvest].Script.DAS
        Plant SPRUM
        Manager AutomaticIrrigation: same as BasicSimulation.Field.AutomaticIrrigation
        Manager SowAndHarvest
```csharp
using Models.Soils;
using Models.PMF.Phen;
using System;
using Models.Core;
using Models.PMF;
using APSIM.Shared.Utilities;
using System.Xml.Serialization;
using Newtonsoft.Json;
        
namespace Models
{
    [Serializable] 
    [System.Xml.Serialization.XmlInclude(typeof(Model))]
    public class Script : Model
    {
        [JsonIgnore] public int DAS { get; set; }
        
        [EventSubscribe("StartOfSimulation")]
        private void OnSimulationCommencing(object sender, EventArgs e)
        {
            DAS=0;
        }
        
        [EventSubscribe("DoManagement")]
        private void OnDoManagement(object sender, EventArgs e)
        {
            
            DAS+=1;

        }
    }
}
```
        Manager ApplyFertOnDates: same as BasicSimulation.Field.ApplyFertOnDates
        SprumPastureInstance BasePasture: AgeAtSimulationStart=1; YearsToMaxDimension=1; RUE=0; Presidue=0.15; RsenRate=0.01; Proot=0.2; PSBaseT=5; PSLOptT=20; PSUOptT=25; PSMaxT=35; GRINZ=false; MaxRD=600; MaxHeight=300; MaxPrunedHeight=100; MaxCover=0.95; MinCover=0.5; ExtinctCoeff=0.5; RegrowthDuration=300; FullCanopyDuration=0; BaseT=5; OptT=25; MaxT=35; RootNConc=0.01; LeafNConc=0.05; ResidueNConc=0.01; LegumePropn=0; GSMax=0.006; R50=120; WaterStress=false
        BiomassRemovalEvents OnCut: NameOfPlantToRemoveFrom=SPRUM; RemovalType=0
          BiomassRemovalFractions:
            PlantName  OrganName  TypeString  LiveToRemove  DeadToRemove  LiveToResidue  DeadToResidue
            SPRUM      Residue    Cutting     0             0             0.5            0.5
            SPRUM      Leaf       Cutting     1             1             0              0
            SPRUM      Nodule     Cutting     0             0             0              0
            SPRUM      Root       Cutting     0             0             0.25           0.25
  Memo Example SprumPastureInstances
    Below we have provided a couple of SprumPastureInstances as a start point for users.  These are not to be considered as validated models and the user must review and adjust parameter settings based on their own knowledge of the pastures being simulated and on careful review of the behaviour of simulations using SPRUM
  SprumPastureInstance Lucerne: EstablishDate=10-Mar; AgeAtSimulationStart=0; YearsToMaxDimension=2; RUE=1.6; Presidue=0.15; RsenRate=0.01; Proot=0.1; PSBaseT=5; PSLOptT=25; PSUOptT=25; PSMaxT=40; GRINZ=false; MaxRD=2500; MaxHeight=500; MaxPrunedHeight=50; MaxCover=0.97; MinCover=0.05; ExtinctCoeff=0.85; RegrowthDuration=300; FullCanopyDuration=10000; BaseT=8; OptT=25; MaxT=35; RootNConc=0.01; LeafNConc=0.05; ResidueNConc=0.01; LegumePropn=1; GSMax=0.008; R50=175; WaterStress=true
  SprumPastureInstance Ryegrass: EstablishDate=24-Mar; AgeAtSimulationStart=0; YearsToMaxDimension=1; RUE=1; Presidue=0.15; RsenRate=0.01; Proot=0.1; PSBaseT=0; PSLOptT=16; PSUOptT=16; PSMaxT=25; GRINZ=false; MaxRD=800; MaxHeight=300; MaxPrunedHeight=100; MaxCover=0.97; MinCover=0.1; ExtinctCoeff=0.6; RegrowthDuration=500; FullCanopyDuration=10000; BaseT=0; OptT=20; MaxT=30; RootNConc=0.01; LeafNConc=0.025; ResidueNConc=0.01; LegumePropn=0; GSMax=0.004; R50=150; WaterStress=true
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