Simulations: Version=198
  DataStore
  Simulation Decidious5mRowGrassAlley
    Clock: Start=2000-07-21; End=2011-07-01
    Summary SummaryFile
    Weather: FileName=%root%/Examples/WeatherFiles/NZ_Lincoln.met
    MicroClimate: a_interception=0; b_interception=1; c_interception=0; d_interception=0; SoilHeatFluxFraction=0.4; MinimumHeightDiffForNewLayer=0; NightInterceptionFraction=0.5; ReferenceHeight=2
    SoilArbitrator Soil Arbitrator
    Manager AutoIrrigationDeficitBased
      AllowIrrigation = True
      depthPAWC = 1000
      triggerDeficit = 80
      irrigateAmount = 15
      returndays = 3
      IrrigateAlley = True
```csharp
using APSIM.Core;
using Models.Interfaces;
using System;
using Models.Core;
using Models.PMF;
using Models.Soils;
using System.Xml.Serialization;
using APSIM.Shared.Utilities;
using Newtonsoft.Json;

        
namespace Models
{
    [Serializable] 
    [System.Xml.Serialization.XmlInclude(typeof(Model))]
    public class Script : Model, ILocatorDependency
    {
        [Link] private Clock Clock;
        [Link] private Zone patch;
        [Link] private ISummary summary;
        [Link] private Soil Soil;
        [Link(IsOptional = true)] private IPlant existingCrop;
        [Link] private IPhysical soilPhysical;
        [Link] private ISoilWater waterBalance;
        [Link(Type = LinkType.Scoped, ByName = true)] private Zone Row;
        [Link(Type = LinkType.Scoped, ByName = true)] private Zone Alley;
        private double TopDUL;
        private double TopLL;
        private int nLayers;
        [NonSerialized]
        private ILocator locator;
        //[Link] private Irrigation Irrigation;
       
        // Parameters from user interface
        [Separator("Manager for controlling automatic irrigation")]
        [Description(" Allow this manager to control irrigation?")]
        public bool AllowIrrigation { get; set; }
      
        [Separator(" Parameters for the irrigation system")]
        [Description(" Depth to calculate PAWC and deficit (mm)")]
        public double depthPAWC { get; set; }
        [Description(" Deficit to trigger irrigations (% PAWC)")]
        public double triggerDeficit { get; set; }
        [Description(" Irrigation amount to apply each event (mm)")]
        public double irrigateAmount { get; set; }
        [Description(" Minimum days for irrigation to return")]
        public double returndays { get; set; }
        
        [Description("Is the Alley zone irrigated?")]
        public bool IrrigateAlley {get; set;}

        //Class members
        [JsonIgnore] public double IrrigLayerSWDeficit { get; set; }
        [JsonIgnore] public double TopSWC { get; set; }
        [JsonIgnore] public double DaysSinceIrrigation { get; set; }
        [JsonIgnore] public double AmountToApply { get; set; }
        [JsonIgnore] public double SeasonAppliedAmount { get; set; }
        
        private bool IrrigationIsAllowed { get; set; }
        private bool CropIsActive { get; set; }
        private bool IrrigatorIsAvailable { get; set; }
        private bool SoilIsDry { get; set; }

    
        //Calculate static soil variables

        public void SetLocator(ILocator locator) => this.locator = locator;

        [EventSubscribe("StartOfSimulation")]
        private void OnStartOfSimulation(object sender, EventArgs e)
        {
            
            //Can we irrigate at all?
            IrrigationIsAllowed = false; 
            if (AllowIrrigation)
                IrrigationIsAllowed = true; 

            //Calculate soil water variables
            double depthFromSurface = 0.0;
            double fracLayer = 0.0;
            nLayers = soilPhysical.Thickness.Length;
            for (int layer = 0; layer < nLayers; layer++)
            {
                fracLayer = Math.Min(1.0, (depthPAWC - depthFromSurface) / soilPhysical.Thickness[layer]);
                TopLL += soilPhysical.LL15mm[layer] * fracLayer;
                TopDUL += soilPhysical.DULmm[layer] * fracLayer;
                depthFromSurface += soilPhysical.Thickness[layer];
                if (depthFromSurface >= depthPAWC)
                    layer = nLayers;
            }
        }
             
        //Determine daily requirement for irrigation
        [EventSubscribe("StartOfDay")]
        private void OnStartOfDay(object sender, EventArgs e)
        {
            AmountToApply = 0.0;
            DaysSinceIrrigation += 1;

            //Is the row crop actively growing?
            CropIsActive = false;
            double StageCode = (double)locator.Get("STRUM.Phenology.Stage", relativeTo: Row);
            if ((StageCode > 3.0) && (StageCode<5.0))
            {
                CropIsActive = true;
            }
          
            //Is the irrigator available?
            IrrigatorIsAvailable = false;
            if (DaysSinceIrrigation >= returndays)
                IrrigatorIsAvailable = true;
          
            //Is the soil dry enough to require irrigation?
            SoilIsDry = false;
            double depthFromSurface = 0.0;
            double fracLayer = 0.0;
            TopSWC = 0.0;
            for (int layer = 0; layer < nLayers; layer++)
            //for (int layer = 0; depthFromSurface < depthPAWC + soilPhysical.Thickness[layer]; layer++)
            {
                fracLayer = Math.Min(1.0, (depthPAWC - depthFromSurface) / soilPhysical.Thickness[layer]);
                TopSWC += waterBalance.SWmm[layer] * fracLayer;
                depthFromSurface += soilPhysical.Thickness[layer];
                if (depthFromSurface >= depthPAWC)
                    layer = nLayers;
            }
            
            IrrigLayerSWDeficit = TopSWC - TopDUL;
            if (Math.Max(0.0, -IrrigLayerSWDeficit) >= (TopDUL - TopLL) * (100 - triggerDeficit) / 100)
                SoilIsDry = true;

            //Are all the conditions ratifying irrigation
            if (IrrigationIsAllowed && CropIsActive && IrrigatorIsAvailable && SoilIsDry)
            {
                //Lets irrigate well !!!!
                Irrigation irrigRow = (Irrigation)locator.Get("Irrigation", relativeTo: Row);
                irrigRow.Apply(irrigateAmount, depth: 0);
                DaysSinceIrrigation = 0;
                if (IrrigateAlley)
                {
                   Irrigation irrigAlley = (Irrigation)locator.Get("Irrigation", relativeTo: Alley);
                   irrigAlley.Apply(irrigateAmount , depth: 0);           
                }
            }
        }
    }
}
```
    Manager AutomaticFertiliser
      AllowFertiliser = yes
      Depth2SoilN = 1500
      CriticalSoilN = 30
      FertNAmount = 50
      FertType = UreaN
      FertApplicationDepth = 10
      FertMinimumDays = 15
```csharp
using APSIM.Core;
using System;
using Models.Core;
using Models.PMF;
using Models.Soils;
using APSIM.Shared.Utilities;
using System.Xml.Serialization;
using Models.Interfaces;
using Models.Soils.Nutrients;
using Newtonsoft.Json;

namespace Models
{
    [Serializable]
    public class Script : Model, ILocatorDependency
    {
        [Link] private Clock Clock;
        [Link] private Fertiliser fertiliser;
        [Link] private ISummary summary;
        [Link] private Soil Soil;
        [Link(Type = LinkType.Scoped, ByName = true)] private Zone Row;
        private DateTime lastApplicationDate;
        private bool fertiliserIsAllowed;
        private int nLayers;
        [Link(ByName = true)]
        private ISolute NO3;
        [Link(ByName = true)]
        private ISolute NH4;
        [Link(ByName = true)]
        private ISolute Urea;
        [Link]
        private IPhysical soilPhysical;
        [NonSerialized]
        private ILocator locator;

        //User inputs from properties tab
        [Description("Turn fertiliser applications on? ")]
        public yesnoType AllowFertiliser { get; set; }
        
        [Description("Depth to calculate available soil N (mm): ")]
        public double Depth2SoilN { get; set; }

        [Description("Minimum available N, triggers an application (kgN/ha): ")]
        public double CriticalSoilN { get; set; }

        [Description("Amount of N fertiliser for each application (kgN/ha): ")]
        public double FertNAmount { get; set; }

        [Description("Type of N fertiliser to apply: ")]
        [Display(Type = DisplayType.FertiliserType)]public string FertType { get; set; }

        [Description("Depth at which to apply the fertiliser (mm): ")]
        public double FertApplicationDepth { get; set; }
       
        [Description("Minimum period between applications (days): ")]
        public double FertMinimumDays { get; set; }
       
        public enum yesnoType
        {
            /// <summary>a positive answer</summary>
            yes,
            /// <summary>a negative answer</summary>
            no
        }

        [JsonIgnore] public double TopMineralN { get; set; }
        private bool CropIsActive { get; set; }
        


        public void SetLocator(ILocator locator) => this.locator = locator;

        [EventSubscribe("StartOfSimulation")]
        private void OnStartOfSimulation(object sender, EventArgs e)
        {
            fertiliserIsAllowed = (AllowFertiliser == yesnoType.yes);
            nLayers = soilPhysical.Thickness.Length;
        }

        [EventSubscribe("DoManagement")]
        private void OnDoManagement(object sender, EventArgs e)
        {
            double daysSinceLastApplication = (Clock.Today - lastApplicationDate).TotalDays;
            
            //Is the row crop actively growing?
            CropIsActive = false;
            double StageCode = (double)locator.Get("STRUM.Phenology.Stage", relativeTo: Row);
            if ((StageCode > 3.0) && (StageCode<5.0))
            {
                CropIsActive = true;
            }
            
            // get the N stored in the soil
            double depthFromSurface = 0.0;
            double fracLayer = 0.0;
            TopMineralN = 0.0;
            for (int layer = 0; layer < nLayers; layer++)
            {
                fracLayer = Math.Min(1.0, (Depth2SoilN - depthFromSurface) / soilPhysical.Thickness[layer]);
                TopMineralN += (NO3.kgha[layer]
                + NH4.kgha[layer]
                + Urea.kgha[layer])
                * fracLayer;
                depthFromSurface += soilPhysical.Thickness[layer];
                if (depthFromSurface >= Depth2SoilN)
                    layer = nLayers;
            }

            if (fertiliserIsAllowed && CropIsActive && (daysSinceLastApplication >= FertMinimumDays) && (TopMineralN <= CriticalSoilN))
            {
                fertiliser.Apply(FertNAmount, FertType, FertApplicationDepth);
                lastApplicationDate = Clock.Today;
            }
        }
    }
}
```
    ZoneAgregate
    Report ZoneAgregateReport: EventNames=[Clock].DoReport
      VariableNames:
        [Clock].Today
        [ZoneAgregate].SimulationArea
        [ZoneAgregate].Eop.Amount
        [ZoneAgregate].Eop.Pm2
        [ZoneAgregate].Eop.AmountByZone[1]
        [ZoneAgregate].Eop.AmountByZone[2]
        [ZoneAgregate].Ro.Amount
        [ZoneAgregate].Ro.Pm2
        [ZoneAgregate].Ro.AmountByZone[1]
        [ZoneAgregate].Ro.AmountByZone[2]
        [ZoneAgregate].Ri.Amount
        [ZoneAgregate].Ri.Pm2
        [ZoneAgregate].Ri.AmountByZone[1]
        [ZoneAgregate].Ri.AmountByZone[2]
        [ZoneAgregate].Et.Amount
        [ZoneAgregate].Et.Pm2
        [ZoneAgregate].Et.AmountByZone[1]
        [ZoneAgregate].Et.AmountByZone[2]
        [ZoneAgregate].AccumulatedIrrigation.Amount
        [ZoneAgregate].AccumulatedIrrigation.Pm2
        [ZoneAgregate].AccumulatedIrrigation.AmountByZone[1]
        [ZoneAgregate].AccumulatedIrrigation.AmountByZone[2]
        [ZoneAgregate].AccumulatedNitrogen.Amount
        [ZoneAgregate].AccumulatedNitrogen.Pm2
        [ZoneAgregate].AccumulatedNitrogen.AmountByZone[1]
        [ZoneAgregate].AccumulatedNitrogen.AmountByZone[2]
        [ZoneAgregate].FintTreeGreen
        [ZoneAgregate].FintTreeDead
        [ZoneAgregate].FintTreeTotal
        [ZoneAgregate].FintUnderstoryGreen
        [ZoneAgregate].FintUnderstoryDead
    RectangularZone Row: Length=100; Width=1.3; CanopyType=TreeRow; Slope=0; AspectAngle=0; Altitude=50
      Soil: Latitude=0; Longitude=0
        LayerStructure: Thickness=[200, 200, 200, 200, 200, 200, 300, 300, 400, 800]
        Chemical: PHUnits=Water
          Thickness  PH   CEC
          100        6.6  12.44
          200        6.2  11.6525
          300        5.7  11.045
          300        5.5  10.6625
          300        5.5  9.4025
          300        5.5  9.4025
          CEC source: Calculated
        Water: Thickness=[300, 300, 300, 300, 300, 300, 1200]; InitialValues=[0.42, 0.41, 0.5, 0.46, 0.45, 0.43, 0.43]; FilledFromTop=false
        WaterBalance SoilWater: SummerDate=1-Nov; SummerU=9; SummerCona=4.4; WinterDate=1-Apr; WinterU=9; WinterCona=4.4; DiffusConst=88; DiffusSlope=35.4; Salb=0.3; CN2Bare=68; CNRed=20; CNCov=0.8; DischargeWidth=0; CatchmentArea=0; PSIDul=-100
          Thickness  SWCON  KLAT
          300        0.55   0
          300        0.55   0
          300        0.55   0
          300        0.55   0
          300        0.1    0
          300        0.02   0
          400        0.02   0
          800        0      0
        Organic: FOMCNRatio=30; CarbonUnits=Total
          Thickness  Carbon  SoilCNRatio  FBiom  FInert  FOM
          100        1.82    11.5         0.025  0.3     1243.931
          200        1.47    11.5         0.025  0.4     833.832
          300        1.2     11.5         0.015  0.75    457.617
          300        1.03    11.5         0.01   0.9     251.145
          300        0.47    11.5         0.01   0.96    137.831
          300        0.47    11.5         0.01   0.96    75.644
        OutputLayers: Thickness=[300, 300, 300, 300, 300, 300]
        Solute NO3: Thickness=[100, 200, 300, 300, 300, 300]; InitialValues=[217, 15, 1.66667, 1.66667, 0, 0]; InitialValuesUnits=ppm; WaterTableConcentration=0; D0=0; DepthConstant=0; MaxDepthSoluteAccessible=0; RunoffEffectivenessAtMovingSolute=0; MaxEffectiveRunoff=0
        Solute NH4: Thickness=[100, 200, 300, 300, 300, 300]; InitialValues=[0, 0, 0, 0, 0, 0]; InitialValuesUnits=ppm; WaterTableConcentration=0; D0=0; DepthConstant=0; MaxDepthSoluteAccessible=0; RunoffEffectivenessAtMovingSolute=0; MaxEffectiveRunoff=0
        Solute Urea: Thickness=[100, 200, 300, 300, 300, 300]; InitialValues=[0, 0, 0, 0, 0, 0]; InitialValuesUnits=kg/ha; WaterTableConcentration=0; D0=0; DepthConstant=0; MaxDepthSoluteAccessible=0; RunoffEffectivenessAtMovingSolute=0; MaxEffectiveRunoff=0
        Physical
          Thickness  ParticleSizeSand  ParticleSizeSilt  ParticleSizeClay  Rocks     BD  AirDry  LL15  DUL   SAT   KS
          300        5                 65                30                0.136527  1   0.2     0.2   0.4   0.5   100
          300        5                 65                30                0.136527  1   0.2     0.2   0.4   0.5   100
          300        5                 65                30                0.136527  1   0.25    0.25  0.3   0.5   50
          300        5                 65                30                0.136527  1   0.2     0.2   0.3   0.5   40
          300        5                 65                30                0.136527  1   0.2     0.2   0.25  0.5   40
          300        5                 65                30                0         1   0.2     0.2   0.25  0.53  40
          1200       5                 65                30                0         1   0.2     0.2   0.25  0.53  40
          Rocks, ParticleSizeSand, ParticleSizeSilt, ParticleSizeClay source: Calculated
          SoilCrop STRUMSoil: LL=[0.2, 0.2, 0.2, 0.2, 0.2, 0.2, 0.2]; KL=[1, 1, 1, 1, 1, 1, 1]; XF=[1, 1, 1, 1, 1, 1, 1]
          SoilCrop SPRUMSoil: LL=[0.2, 0.2, 0.2, 0.2, 0.2, 0.2, 0.2]; KL=[0.11, 0.11, 0.11, 0.11, 0.11, 0.11, 0.11]; XF=[1, 1, 1, 1, 1, 1, 1]
        Nutrient
        SoilTemperature Temperature
      SurfaceOrganicMatter: InitialResidueName=wheat_stubble; InitialResidueType=wheat; InitialResidueMass=500; InitialStandingFraction=0; InitialCPR=0; InitialCNR=100
      Fertiliser
      Irrigation
      Plant STRUM
      StrumTreeInstance Apple: TreeType=Deciduous; RowSpacing=5; InterRowSpacing=1; AlleyZoneWidthFrac=0.6; AgeAtSimulationStart=1; YearsToMaxDimension=6; TrunkMassAtMaxDimension=50; BudBreakDate=1-Oct; StartFullCanopyDate=15-Dec; StartLeafFallDate=30-Apr; EndLeafFallDate=5-Jun; GRINZ=true; MaxRD=3000; Proot=0.15; Pleaf=0.15; Ptrunk=0.5; CanopyBaseHeight=1000; MaxPrunedHeight=2500; MaxHeight=3500; MaxWidth=4500; MaxPrunedWidth=3500; RootNConc=0.01; LeafNConc=0.02; TrunkNConc=0.01; FruitNConc=0.02; ExtinctCoeff=0.6; BaseCover=0; MaxCover=0.95; RUE=1.6; PSBaseT=5; PSLOptT=20; PSUOptT=25; PSMaxT=35; GSMax=0.006; R50=100; SurfaceKL=0.1; WaterStress=false; Number=50; PotentialFWPerFruit=175; DMC=0.2; FruitDensity=0.75; DateMaxBloom=1-oct; DAFStartLinearGrowth=30; DAFEndLinearGrowth=90; DAFMaxSize=150
      BiomassRemovalEvents Pick: NameOfPlantToRemoveFrom=STRUM; RemovalType=0; RemovalDates=[1-may]
        BiomassRemovalFractions:
          PlantName  OrganName  TypeString  LiveToRemove  DeadToRemove  LiveToResidue  DeadToResidue
          STRUM      Root       Cutting     0             0             0              0
          STRUM      Leaf       Cutting     0             0             0.05           0
          STRUM      Trunk      Cutting     0             0             0.05           0
          STRUM      Fruit      Cutting     0.85          0             0.05           0
      BiomassRemovalEvents Prune: NameOfPlantToRemoveFrom=STRUM; RemovalType=3; RemovalDates=[1-Jun]
        BiomassRemovalFractions:
          PlantName  OrganName  TypeString  LiveToRemove  DeadToRemove  LiveToResidue  DeadToResidue
          STRUM      Root       Pruning     0             0             0              0
          STRUM      Leaf       Pruning     0             0             1              1
          STRUM      Trunk      Pruning     0             0             0.15           0.9
          STRUM      Fruit      Pruning     0             0             1              1
      Report RowZoneReport: EventNames=[Clock].DoReport
        VariableNames:
          [Clock].Today
          [Row].Area
          [Row].STRUM.CanopyArea
          [Row].STRUM.RootUptakesArbitrator.WaterDemand.Amount
          [Row].STRUM.RootUptakesArbitrator.WaterDemand.mm
          [Row].STRUM.RootUptakesArbitrator.NitrogenDemand.Amount
          [Row].STRUM.Root.Network.WtByLayerZone1
          [Row].STRUM.Root.Network.WtByLayerZone2
          [Row].STRUM.Arbitrator.Carbon.TotalPlantDemand
          [Row].STRUM.Arbitrator.Carbon.TotalPlantSupply
          [Row].STRUM.Arbitrator.Carbon.TotalPlantDemandsAllocated
          [Row].STRUM.Arbitrator.Fn
          [Row].STRUM.Arbitrator.Nitrogen.TotalPlantDemand
          [Row].STRUM.Arbitrator.Nitrogen.TotalPlantSupply
          [Row].STRUM.Arbitrator.Nitrogen.TotalPlantDemandsAllocated
          [Row].STRUM.Fruit.TotalCarbonDemand.RelativeFruitMass.Delta.Integral
          [Row].STRUM.Fruit.Allocated.Carbon.Total
          [Row].STRUM.Fruit.Allocated.Nitrogen.Total
          [Row].STRUM.Fruit.Carbon.Demands.Structural
          [Row].STRUM.Fruit.Carbon.Demands.Total
          [Row].STRUM.Fruit.DMC
          [Row].STRUM.Fruit.FreshWtPerFruit
          [Row].STRUM.Fruit.NextYearsFruitingBudSurvival
          [Row].STRUM.Fruit.Number.BudsSurvivalFromLastYear
          [Row].STRUM.Fruit.N
          [Row].STRUM.Fruit.Nitrogen.Demands.Total
          [Row].STRUM.Fruit.Number
          [Row].STRUM.Fruit.Diameter
          [Row].STRUM.Fruit.VolumePerFruit
          [Row].STRUM.Fruit.Wt
          [Row].STRUM.Fruit.PotentialDWPerFruit
          [Row].STRUM.Fruit.TotalCarbonDemand.RelativeFruitMass
          [Row].STRUM.Fruit.TotalCarbonDemand.CarbonConc
          [Row].STRUM.Height
          [Row].STRUM.Height.CanopyBaseHeight
          [Row].STRUM.Height.CanopyBaseHeight  + [Row].STRUM.Height.PrunedCanopyDepth
          [Row].STRUM.Height.CanopyBaseHeight  + [Row].STRUM.Height.PrunedCanopyDepth + [Row].STRUM.Height.SeasonalGrowth
          [Row].STRUM.Leaf.Allocated.Carbon.Total
          [Row].STRUM.Leaf.Allocated.Nitrogen.Total
          [Row].STRUM.Leaf.Canopy.CoverGreen
          [Row].STRUM.Leaf.Dead.Wt
          [Row].STRUM.Leaf.Carbon.Demands.Structural
          [Row].STRUM.Leaf.Carbon.Demands.Total
          [Row].STRUM.Leaf.Fn
          [Row].STRUM.Leaf.Canopy.Fw
          [Row].STRUM.Leaf.Canopy.LAI
          [Row].STRUM.Leaf.Live.Wt
          [Row].STRUM.Leaf.N
          [Row].STRUM.Leaf.Nitrogen.Demands.Total
          [Row].STRUM.Leaf.Canopy.PotentialEP
          [Row].STRUM.Leaf.Canopy.RadiationIntercepted
          [Row].STRUM.Leaf.Senesced.Weight.Structural
          [Row].STRUM.Leaf.SenescenceRate
          [Row].STRUM.Leaf.Canopy.Transpiration
          [Row].STRUM.Leaf.Canopy.WaterDemand
          [Row].STRUM.Leaf.Canopy.WaterAllocation
          [Row].STRUM.Leaf.Canopy.Width
          [Row].STRUM.Leaf.Canopy.GreenExtinctionCoefficient
          [Row].STRUM.Leaf.Wt
          [Row].STRUM.Phenology.Age.YearDecimal
          [Row].STRUM.Phenology.Age.Years
          [Row].STRUM.Phenology.CurrentStageName
          [Row].STRUM.Phenology.DaysSinceFlowering
          [Row].STRUM.Phenology.Stage
          [Row].STRUM.RelativeSeasonalDimension
          [Row].STRUM.RelativeAnnualDimension
          [Row].STRUM.Root.Allocated.Carbon.Total
          [Row].STRUM.Root.Allocated.Nitrogen.Total
          [Row].STRUM.Root.Network.Depth
          [Row].STRUM.Root.Carbon.Demands.Structural
          [Row].STRUM.Root.Carbon.Demands.Total
          [Row].STRUM.Root.N
          [Row].STRUM.Root.Nitrogen.Demands.Total
          [Row].STRUM.RootUptakesArbitrator.WaterUptake.AmountByZone
          [Row].STRUM.RootUptakesArbitrator.WaterUptake.Mm
          [Row].STRUM.RootUptakesArbitrator.WaterUptake.Amount
          [Row].STRUM.RootUptakesArbitrator.NitrogenUptake.AmountByZone
          [Row].STRUM.RootUptakesArbitrator.NitrogenUptake.Gpm2
          [Row].STRUM.RootUptakesArbitrator.NitrogenUptake.Amount
          [Row].STRUM.RootUptakesArbitrator.WaterSupply.AmountByZone
          [Row].STRUM.RootUptakesArbitrator.WaterSupply.Mm
          [Row].STRUM.RootUptakesArbitrator.WaterSupply.Amount
          [Row].STRUM.RootUptakesArbitrator.NitrogenSupply.AmountByZone
          [Row].STRUM.RootUptakesArbitrator.NitrogenSupply.Gpm2
          [Row].STRUM.RootUptakesArbitrator.NitrogenSupply.Amount
          [Row].STRUM.Root.Wt
          [Row].STRUM.TranspirationPerTree
          [Row].STRUM.Trunk.Allocated.Carbon.Total
          [Row].STRUM.Trunk.Allocated.Nitrogen.Total
          [Row].STRUM.Trunk.Carbon.Demands.Structural
          [Row].STRUM.Trunk.Carbon.Demands.Total
          [Row].STRUM.Trunk.EnergyBalance.CoverTotal
          [Row].STRUM.Trunk.EnergyBalance.DeadAreaIndex
          [Row].STRUM.Trunk.EnergyBalance.LAIDead
          [Row].STRUM.Trunk.EnergyBalance.RadiationInterceptedByDead
          [Row].STRUM.Trunk.EnergyBalance.Transpiration
          [Row].STRUM.Trunk.N
          [Row].STRUM.Trunk.Nitrogen.Demands.Total
          [Row].STRUM.Trunk.Wt
          [Row].STRUM.Width
          [Row].STRUM.Width.PrunedWidth
          [Row].STRUM.Width.PrunedWidth + [Row].STRUM.Width.SeasonalGrowth
          [Row].STRUM.TranspirationPerLeafArea
          [Row].SurfaceOrganicMatter.N
          [Row].SurfaceOrganicMatter.Wt
          [Row].Irrigation.IrrigationApplied
          [Row].Fertiliser.NitrogenApplied
          sum([Row].Soil.OutputLayers.SWmm)
          ([Row].Soil.OutputLayers.SWmm[1] + [Row].Soil.OutputLayers.SWmm[1] + [Row].Soil.OutputLayers.SWmm[1]) as SWmm90
          [Row].Soil.OutputLayers.SW
          [Row].Soil.OutputLayers.SAT
          [Row].Soil.OutputLayers.DUL
          [Row].Soil.OutputLayers.LL15
          [Row].Soil.OutputLayers.Drainage
          [Row].Soil.SoilWater.Evaporation
          [Row].Soil.SoilWater.Eo
          [Weather].PanEvap
          [Weather].Radn
          [Weather].Rain
    RectangularZone Alley: Length=100; Width=2.2; CanopyType=TreeRow; Slope=0; AspectAngle=0; Altitude=50
      Report AlleyZoneReport: EventNames=[Clock].DoReport
        VariableNames:
          [Clock].Today
          [Alley].Area
          [Alley].SPRUM.RootUptakesArbitrator.WaterDemand.Amount
          [Alley].SPRUM.RootUptakesArbitrator.WaterSupply.Amount
          [Alley].SPRUM.RootUptakesArbitrator.WaterUptake.Amount
          [Alley].SPRUM.RootUptakesArbitrator.NitrogenDemand.Amount
          [Alley].SPRUM.RootUptakesArbitrator.NitrogenSupply.Amount
          [Alley].SPRUM.RootUptakesArbitrator.NitrogenUptake.Amount
          [Alley].SPRUM.Root.Network.WtByLayerZone1
          [Alley].SPRUM.Root.Network.WtByLayerZone2
          [Alley].SPRUM.Arbitrator.Carbon.TotalPlantDemand
          [Alley].SPRUM.Arbitrator.Carbon.TotalPlantSupply
          [Alley].SPRUM.Arbitrator.Carbon.TotalPlantDemandsAllocated
          [Alley].SPRUM.Arbitrator.Fn
          [Alley].SPRUM.Arbitrator.Nitrogen.TotalPlantDemand
          [Alley].SPRUM.Arbitrator.Nitrogen.TotalPlantSupply
          [Alley].SPRUM.Arbitrator.Nitrogen.TotalPlantDemandsAllocated
          [Alley].SPRUM.Height
          [Alley].SPRUM.Leaf.Allocated.Carbon.Total
          [Alley].SPRUM.Leaf.Allocated.Nitrogen.Total
          [Alley].SPRUM.Leaf.Canopy.CoverGreen
          [Alley].SPRUM.Leaf.Dead.Wt
          [Alley].SPRUM.Leaf.Carbon.Demands.Structural
          [Alley].SPRUM.Leaf.Carbon.Demands.Total
          [Alley].SPRUM.Leaf.Fn
          [Alley].SPRUM.Leaf.Canopy.Fw
          [Alley].SPRUM.Leaf.Canopy.LAI
          [Alley].SPRUM.Leaf.Live.Wt
          [Alley].SPRUM.Leaf.N
          [Alley].SPRUM.Leaf.Nitrogen.Demands.Total
          [Alley].SPRUM.Leaf.Canopy.PotentialEP
          [Alley].SPRUM.Leaf.Canopy.RadiationIntercepted
          [Alley].SPRUM.Leaf.Senesced.Weight.Structural
          [Alley].SPRUM.Leaf.SenescenceRate
          [Alley].SPRUM.Leaf.Canopy.Transpiration
          [Alley].SPRUM.Leaf.Canopy.WaterDemand
          [Alley].SPRUM.Leaf.Canopy.WaterAllocation
          [Alley].SPRUM.Leaf.Canopy.Width
          [Alley].SPRUM.Leaf.Wt
          [Alley].SPRUM.Phenology.Age.YearDecimal
          [Alley].SPRUM.Phenology.Age.Years
          [Alley].SPRUM.Phenology.CurrentStageName
          [Alley].SPRUM.Phenology.Stage
          [Alley].SPRUM.RelativeAnnualDimension
          [Alley].SPRUM.Root.Allocated.Carbon.Total
          [Alley].SPRUM.Root.Allocated.Nitrogen.Total
          [Alley].SPRUM.Root.Network.Depth
          [Alley].SPRUM.Root.Carbon.Demands.Structural
          [Alley].SPRUM.Root.Carbon.Demands.Total
          [Alley].SPRUM.Root.N
          [Alley].SPRUM.Root.Nitrogen.Demands.Total
          [Alley].SPRUM.RootUptakesArbitrator.WaterUptake.AmountByZone
          [Alley].SPRUM.RootUptakesArbitrator.WaterUptake.Mm
          [Alley].SPRUM.RootUptakesArbitrator.WaterUptake.Amount
          [Alley].SPRUM.RootUptakesArbitrator.NitrogenUptake.AmountByZone
          [Alley].SPRUM.RootUptakesArbitrator.NitrogenUptake.Gpm2
          [Alley].SPRUM.RootUptakesArbitrator.NitrogenUptake.Amount
          [Alley].SPRUM.RootUptakesArbitrator.WaterSupply.AmountByZone
          [Alley].SPRUM.RootUptakesArbitrator.WaterSupply.Mm
          [Alley].SPRUM.RootUptakesArbitrator.WaterSupply.Amount
          [Alley].SPRUM.RootUptakesArbitrator.NitrogenSupply.AmountByZone
          [Alley].SPRUM.RootUptakesArbitrator.NitrogenSupply.Gpm2
          [Alley].SPRUM.RootUptakesArbitrator.NitrogenSupply.Amount
          [Alley].SPRUM.Root.Wt
          [Alley].SPRUM.Residue.Allocated.Carbon.Total
          [Alley].SPRUM.Residue.Allocated.Nitrogen.Total
          [Alley].SPRUM.Residue.Carbon.Demands.Structural
          [Alley].SPRUM.Residue.Carbon.Demands.Total
          [Alley].SPRUM.Residue.N
          [Alley].SPRUM.Residue.Nitrogen.Demands.Total
          [Alley].SPRUM.Residue.Wt
          [Alley].SurfaceOrganicMatter.N
          [Alley].SurfaceOrganicMatter.Wt
          [Alley].Irrigation.IrrigationApplied
          [Alley].Fertiliser.NitrogenApplied
          sum([Alley].Soil.OutputLayers.SWmm)
          ([Alley].Soil.OutputLayers.SWmm[1] + [Alley].Soil.OutputLayers.SWmm[1] + [Alley].Soil.OutputLayers.SWmm[1]) as SWmm90
          [Alley].Soil.OutputLayers.SW
          [Alley].Soil.OutputLayers.SAT
          [Alley].Soil.OutputLayers.DUL
          [Alley].Soil.OutputLayers.LL15
          [Alley].Soil.SoilWater.Drainage
          [Alley].Soil.SoilWater.Evaporation
          [Alley].Soil.SoilWater.Eo
          [Weather].PanEvap
          [Weather].Radn
          [Weather].Rain
      Soil: Latitude=0; Longitude=0
        LayerStructure: Thickness=[200, 200, 200, 200, 200, 200, 300, 300, 400, 800]
        Chemical: same as Decidious5mRowGrassAlley.Row.Soil.Chemical
        Water: Thickness=[300, 300, 300, 300, 300, 300, 1200]; InitialValues=[0.4, 0.4, 0.4, 0.46, 0.45, 0.43, 0.43]; FilledFromTop=false
        WaterBalance SoilWater: same as Decidious5mRowGrassAlley.Row.Soil.SoilWater
        Organic: FOMCNRatio=30; CarbonUnits=Total
          Thickness  Carbon  SoilCNRatio  FBiom  FInert  FOM
          100        1.82    11.5         0.025  0.3     1243.93
          200        1.47    11.5         0.025  0.4     833.832
          300        1.2     11.5         0.015  0.75    457.617
          300        1.03    11.5         0.01   0.9     251.145
          300        0.47    11.5         0.01   0.96    137.831
          300        0.47    11.5         0.01   0.96    75.6435
        OutputLayers: Thickness=[300, 300, 300, 300, 300, 300]
        Solute NO3: same as Decidious5mRowGrassAlley.Row.Soil.NO3
        Solute NH4: same as Decidious5mRowGrassAlley.Row.Soil.NH4
        Solute Urea: same as Decidious5mRowGrassAlley.Row.Soil.Urea
        Physical
          Thickness  ParticleSizeSand  ParticleSizeSilt  ParticleSizeClay  Rocks     BD  AirDry  LL15  DUL   SAT   KS
          300        5                 65                30                0.136527  1   0.2     0.2   0.4   0.5   100
          300        5                 65                30                0.136527  1   0.2     0.2   0.4   0.5   100
          300        5                 65                30                0.136527  1   0.25    0.25  0.3   0.5   50
          300        5                 65                30                0.136527  1   0.2     0.2   0.21  0.5   40
          300        5                 65                30                0.136527  1   0.2     0.2   0.21  0.5   40
          300        5                 65                30                0         1   0.2     0.2   0.21  0.53  40
          1200       5                 65                30                0         1   0.2     0.2   0.21  0.53  40
          Rocks, ParticleSizeSand, ParticleSizeSilt, ParticleSizeClay source: Calculated
          SoilCrop STRUMSoil: LL=[0.2, 0.2, 0.2, 0.2, 0.2, 0.2, 0.2]; KL=[1, 1, 1, 1, 1, 1, 1]; XF=[1, 1, 1, 1, 1, 1, 1]
          SoilCrop SPRUMSoil: LL=[0.2, 0.2, 0.2, 0.2, 0.2, 0.2, 0.2]; KL=[0.11, 0.11, 0.11, 0.11, 0.11, 0.11, 0.11]; XF=[1, 1, 1, 1, 1, 1, 1]
        Nutrient
        SoilTemperature Temperature
      SurfaceOrganicMatter: InitialResidueName=wheat_stubble; InitialResidueType=wheat; InitialResidueMass=500; InitialStandingFraction=0; InitialCPR=0; InitialCNR=100
      Fertiliser
      Irrigation
      Plant SPRUM
      SprumPastureInstance UnderStoryPasture: AgeAtSimulationStart=0; YearsToMaxDimension=1; RUE=1; Presidue=0; RsenRate=0; Proot=0.1; PSBaseT=5; PSLOptT=20; PSUOptT=25; PSMaxT=30; GRINZ=true; MaxRD=600; MaxHeight=300; MaxPrunedHeight=100; MaxCover=0.97; MinCover=0.5; ExtinctCoeff=0.5; RegrowthDuration=300; FullCanopyDuration=0; BaseT=3; OptT=25; MaxT=35; RootNConc=0.01; LeafNConc=0.05; ResidueNConc=0.01; LegumePropn=0.2; GSMax=0.004; R50=150; SurfaceKL=0.1; WaterStress=true
      BiomassRemovalEvents Mow: NameOfPlantToRemoveFrom=SPRUM; RemovalType=0
        BiomassRemovalFractions:
          PlantName  OrganName  TypeString  LiveToRemove  DeadToRemove  LiveToResidue  DeadToResidue
          SPRUM      Residue    Cutting     0             0             0.5            0.5
          SPRUM      Leaf       Cutting     0             0             1              1
          SPRUM      Nodule     Cutting     0             0             0              0
          SPRUM      Root       Cutting     0             0             0              0
  Simulation EverGreen7mRowGrassAlley
    Clock: Start=2000-07-21; End=2011-07-01
    Summary SummaryFile
    Weather: FileName=%root%/Examples/WeatherFiles/NZ_Hamilton.met
    MicroClimate: a_interception=0; b_interception=1; c_interception=0; d_interception=0; SoilHeatFluxFraction=0.4; MinimumHeightDiffForNewLayer=0; NightInterceptionFraction=0.5; ReferenceHeight=2
    SoilArbitrator Soil Arbitrator
    Manager AutoIrrigationDeficitBased: same as Decidious5mRowGrassAlley.AutoIrrigationDeficitBased
    Manager AutomaticFertiliser: same as Decidious5mRowGrassAlley.AutomaticFertiliser
    ZoneAgregate
    Report ZoneAgregateReport: same as Decidious5mRowGrassAlley.ZoneAgregateReport
    RectangularZone Row: Length=100; Width=1.3; Slope=0; AspectAngle=0; Altitude=50
      Report RowZoneReport: same as Decidious5mRowGrassAlley.Row.RowZoneReport
      Soil: same as Decidious5mRowGrassAlley.Row.Soil
      SurfaceOrganicMatter: InitialResidueName=wheat_stubble; InitialResidueType=wheat; InitialResidueMass=500; InitialStandingFraction=0; InitialCPR=0; InitialCNR=100
      Fertiliser
      Irrigation
      Plant STRUM
      StrumTreeInstance Avocado: TreeType=Ever green; RowSpacing=7; InterRowSpacing=7; AlleyZoneWidthFrac=0.1; AgeAtSimulationStart=10; YearsToMaxDimension=6; TrunkMassAtMaxDimension=150; BudBreakDate=10-Aug; StartFullCanopyDate=8-Mar; StartLeafFallDate=27-Apr; EndLeafFallDate=16-Jun; GRINZ=true; MaxRD=3000; Proot=0.1; Pleaf=0.2; Ptrunk=0.5; CanopyBaseHeight=1800; MaxPrunedHeight=5000; MaxHeight=5700; MaxWidth=6500; MaxPrunedWidth=5800; RootNConc=0.01; LeafNConc=0.02; TrunkNConc=0.01; FruitNConc=0.02; ExtinctCoeff=0.5; BaseCover=0.85; MaxCover=0.96; RUE=1.3; PSBaseT=5; PSLOptT=20; PSUOptT=25; PSMaxT=35; GSMax=0.005; R50=200; SurfaceKL=0.1; WaterStress=true; Number=12; PotentialFWPerFruit=250; DMC=0.29; FruitDensity=0.43; DateMaxBloom=20-oct; DAFStartLinearGrowth=130; DAFEndLinearGrowth=290; DAFMaxSize=350
      BiomassRemovalEvents Pick: NameOfPlantToRemoveFrom=STRUM; RemovalType=0; RemovalDates=[5-Oct]
        BiomassRemovalFractions:
          PlantName  OrganName  TypeString  LiveToRemove  DeadToRemove  LiveToResidue  DeadToResidue
          STRUM      Root       Cutting     0             0             0              0
          STRUM      Leaf       Cutting     0             0             0.1            0
          STRUM      Trunk      Cutting     0             0             0.05           0
          STRUM      Fruit      Cutting     0.75          0             0.1            0
      BiomassRemovalEvents Prune: NameOfPlantToRemoveFrom=STRUM; RemovalType=3; RemovalDates=[15-Oct]
        BiomassRemovalFractions:
          PlantName  OrganName  TypeString  LiveToRemove  DeadToRemove  LiveToResidue  DeadToResidue
          STRUM      Root       Pruning     0             0             0              0
          STRUM      Leaf       Pruning     0             0             0.15           1
          STRUM      Trunk      Pruning     0             0             0.15           1
          STRUM      Fruit      Pruning     0             0             1              1
    RectangularZone Alley: same as Decidious5mRowGrassAlley.Alley
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