Simulations: Version=190
  DataStore
  Memo HowThisWorks
    This example has simulations on how the SimpleGrazing model works and can be tailored to user's needs. The model is an upgrade to the CutRotation manager and allows different options to trigger the start of grazing.

    The *Urine and Dung* component of the model will always be active in any of the settings that rule a grazing event. First the user has the option of setting up one value, which is the same for the whole period, or values that vary according to the month of the year. Then the depth at wich urine is added can be set. After that, the proportion of N going to dung  can be set by the user. This can be done by providing a single value for the whole period or 12 monthly values, to vary the proportion according to the month of the year. Finally, the C:N ratio of the biomass for dung can be set. Here, if a value of 0 is used, the model will use DM digestibility to calculate the C:N ratio.

    **SimpleRotation**

    >This setting is an example of how a simple grazing based on a interval of fixed days happens. The residual mass after grazing can be set by the user in order to end a grazing event. The minimum DM amount available for a grazing event to happen can also be set up at the *Minimum grazeable dry matter to trigger grazing*. In this setting, there is the option to set up an *Optional no-grazing window*. This allows the user to stop any grazing event from happening between the *Start of the no-grazing window* and *End of the no-grazing window*, independently of any other rule set up to trigger the grazing event. If values are not provided, the model just ignores it.

    **TargetMass**

    >This setting allows the user to set up a DM production target to trigger grazing at the *Monthly target mass of pasture to trigger grazing event*. Here 12 values are needed, one for each month of the year, and they can vary as the user wishes. The residual mass to stop the grazing event can be set at the *Monthly mass of pasture post grazing*. Monthly values can also vary as the user wishes. The user can also set up the *Optional no-grazing* component for this setting.

    **TimingControlledElsewhere**

    >This setting allows the user to set up the grazing rules somewhere else in APSIM, as in an *Operations* component for example. The rules for N and C return cal still be set up at the *SimpleGrazing* user interface. The *Operations* component used in the example presented here is called *Grazing* and there are different methods to trigger the grazing event. When *Graze* is used, the DM amount provided by the user will be the amount to be removed at each grazing event. In this example, the first date shows that 3000 kgDM/ha will be removed on the date specified. The other available method is *GrazeToResidual*, where the amount provided by the user will be what is left after grazing. In the example, the second date shows that on the date specified, the pasture will be grazed down to a residual mass of 2000 kgDM/ha. This is the only setting where the *Optional no-grazing window* will not be available.

    **FlexibleGrazingCover**

    >In this setting, the user can trigger a grazing event via an expression. This example triggers grazing when the canopy (green and dead material) intercepts 95% of the total incoming radiation. The intelisense will work in this component to make it easier for the user to set up the expression needed. This method also supports more elaborate expressions, which can be needed when the simulation deals with mixed species. The simulation *Ryegrass_WhiteClover* is an example of how to trigger grazing when the combination of above ground weight of ryegrass and the standing biomass of white clover are above 3000 kgDM/ha. Note that here we use the 'standing biomass' for white clover because the value used will not consider the stolon mass. If we wanted to account for the stolon mass, 'above ground' would be the output used.

    **Ryegrass_WhiteClover**
    >This is just an example of how SimpleGrazing works with mixed pastures.

    **OptionalRulesForRotation**
    >The user has the option of setting up rules to make sure that grazing events occur despite of not reaching the biomass triggers for grazing (residual or pre grazing). This option is available for the **TargetMass** and **FlexibleGrazing** settings. The *Monthly maximum roation length* is the maximum number of days that the simulation can go without having a grazing event. For example, if we use a maximum rotation length of 50 days it means that, if the pre grazing biomass set up by the user is not reached within 50 days of the last grazing, a grazing event will happen at 50 days.
    >The *Monthly minimum rotation length* is the minimum number of days when a grazing event will not happen, indepently of the target conditions. For example, if a value of 5 days is used as the minimum rotation length, this means that another grazing event cannot happen within 5 days of the last grazing, independently of the biomass targets being met.
  Simulation SimpleRotation
    Clock: Start=1980-07-01; End=1982-07-30
    Weather: FileName=%root%/Examples/WeatherFiles/AU_Dalby.met; Latitude=-27.18; Tav=19.09; Amp=14.63
    SoilArbitrator
    Summary
    Zone Field: Area=1; Slope=0; AspectAngle=0; Altitude=50
      SimpleGrazing: GrazingRotationType=0; SimpleMinGrazable=3500; SimpleGrazingResidual=2000; FlexibleGrazePostDM=0; NoGrazingStartString=01-jun; NoGrazingEndString=15-sep; FractionDefoliatedBiomassToSoil=[1]; FractionDefoliatedNToSoil=[0.25]; FractionExcretedNToDung=[0.3]; DepthUrineIsAdded=10; SendDungElsewhere=0; SendUrineElsewhere=0; UsePatching=false; PseudoPatches=false; ZoneCount=20; UrineReturnPattern=0; PseudoRandomSeed=0; FractionPopulationDecline=0; TramplingOn=false; MaximumPropLitterMovedToSoil=0.1; PastureConsumedAtMaximumRateOfLitterRemoval=1200
        PreGrazeDMArray=[2000, 2000, 2000, 2000, 2000, 2000, 2000, 2000, 2000, 2000, 2000, 2000]
        PostGrazeDMArray=[1000, 1000, 1000, 1000, 1000, 1000, 1000, 1000, 1000, 1000, 1000, 1000]
      Manager FertiliseFixedDates
        EachYear = True
        Dates = 1-jan, 15-jan, 1-feb, 15-feb, 1-mar, 15-mar, 1-apr, 15-apr, 1-may, 15-may, 1-jun, 15-jun, 1-jul, 15-jul, 1-aug, 15-aug, 1-sep, 15-sep, 1-oct, 15-oct, 1-nov, 15-nov, 1-dec, 15-dec
        UseCritNThreshold = False
        CritNThreshold = 50
        CritNDepth = 75
        Depth = 50
        Amount = 100
        FertiliserType = DAP
```csharp
using Models.Interfaces;
using System.Linq;
using APSIM.Shared.Utilities;
using Models.PMF;
using Models.Soils;
using Models.Soils.Nutrients;
using Models.Core;
using System;
using Models.Soils.Nutrients;

namespace Models
{
    [Serializable]
    public class Script : Model
    {
        [Link] private Clock clock;
        [Link] private Fertiliser fertiliser;
        [Link] private ISummary summary;
        [Link] private Soil soil;
        private Nutrient nutrient;
        private Nutrient soilN;
        [Link]
        private IPhysical soilPhysical;
        [Link]
        private Nutrient Nutrient;
        [Link(Path="[SurfaceOrganicMatter].SurfaceResidue.Decomposition")]
        private OrganicFlow ResidueDecomposition;


        [Separator("Fertiliser will be applied on the date(s) below")]
        [Description("Apply fertiliser on the same day(s) each year? If no, then must include the year of appliaction below")]
        public bool EachYear { get; set; }

        [Description("Dates for one or more fertiliser applications (dd-mmm or dd-mmm-yyyy) as a list with a comma between dates")]
        public string[] Dates { get; set; }

        [Separator("Test for the mineral N in the soil and don't apply the fertiliser if greater than X kgN/ha is stored in the soil above a depth of Y mm")]
        [Description("Use a critical soil mineral N to prevent application above a threshold?")]
        public bool UseCritNThreshold { get; set; }

        [Description("Don't add fertiliser if N in the soil to the depth below exceeds (kg/ha)")]
        public double CritNThreshold { get; set; }

        [Description("Depth to which the amount of N in the soil should be calculated (mm)")]
        public double CritNDepth { get; set; }

        [Separator("Fertiliser application details")]
        [Description("Depth at which to apply the fertiliser (mm)")]
        public double Depth { get; set; }

        [Description("Amount of fertiliser to apply (kg N /ha) per application")]
        public double Amount { get; set; }

        [Description("Fertiliser type - select from the list")]
        [Display(Type = DisplayType.FertiliserType)]public string FertiliserType { get; set; }


        [EventSubscribe("StartOfSimulation")]
        private void FindSoilNOrNutrient(object sender, EventArgs e)
        {
            nutrient = this.FindInScope<Nutrient>() as Nutrient;
            soilN = this.FindInScope<Nutrient>() as Nutrient;

            if (nutrient == null && soilN == null)
                throw new Exception(string.Format("Error in script {0}: Unable to find nutrient or soilN.", Name));
        }

        [EventSubscribe("DoManagement")]
        private void OnDoManagement(object sender, EventArgs e)
        {
            if (OnApplicationDate())
            {
                if (NContentBelowThreshold())
                    fertiliser.Apply(Amount, FertiliserType, Depth);
                else
                    summary.WriteMessage(this, "Skipping fertiliser application due to soil mineral N content being above critical threshold.", MessageType.Diagnostic);
            }
        }

        /// <summary>Checks if today's date is one of the specified fertiliser application dates.</summary>
        private bool OnApplicationDate()
        {
            if (EachYear)
                return Dates.Any(d => DateUtilities.DatesEqual(d, clock.Today));
            
            DateTime[] dates = Dates.Select(d => DateTime.ParseExact(d, "d-MMM-yyyy", null)).ToArray();
            return dates.Any(d => SameDate(d, clock.Today));
        }

        /// <summary>Checks if N content in soil is below critical threshold.</summary>
        private bool NContentBelowThreshold()
        {
            if (!UseCritNThreshold)
                return true;
            
            double[] weights = GetLayerWeights();
            double cumSoilN = 0;

            for (int i = 0; i < soilPhysical.Thickness.Length; i++)
            {
                if (nutrient != null)
                    cumSoilN += weights[i] * nutrient.MineralN[i];
                else if (soilN != null)
                    cumSoilN += weights[i] * soilN.MineralN[i];
            }

            return cumSoilN <= CritNThreshold;
        }

        private double[] GetLayerWeights()
        {
            double[] weights = new double[soilPhysical.Thickness.Length];
            double cumDepth = 0;

            for (int i = 0; i < soilPhysical.Thickness.Length; i++)
            {
                cumDepth += soilPhysical.Thickness[i];
                if (cumDepth < CritNDepth)
                    weights[i] = 1;
                else if (cumDepth - soilPhysical.Thickness[i] <= CritNDepth)
                    weights[i] = (CritNDepth - (cumDepth - soilPhysical.Thickness[i])) / soilPhysical.Thickness[i];
                else
                    weights[i] = 0;
            }

            return weights;
        }

        private bool SameDate(DateTime d1, DateTime d2)
        {
            return d1.Year == d2.Year && d1.DayOfYear == d2.DayOfYear;
        }
    }
}
```
      Manager AutomaticIrrigation
        allowIrrigation = True
        seasonStart = 1-sep
        seasonEnd = 30-aug
        seasonsAllocation = 100000
        triggerDeficit = 90
        targetDeficit = 95
        returndays = 1
        maximumAmount = 300
        depthPAWC = 100
```csharp
using Newtonsoft.Json;
using APSIM.Shared.Utilities;
using System.Xml.Serialization;
using Models.Soils;
using Models.PMF;
using Models.Core;
using System.Linq;
using System;
using Models.Interfaces;

        
namespace Models
{
    [Serializable] 
    [System.Xml.Serialization.XmlInclude(typeof(Model))]
    public class Script : Model
    {
        [Link] private ISummary summary;
        [Link] private Irrigation Irrigation;
        [Link] private Clock Clock;
        [Link] private Soil Soil;
        [Link(IsOptional = true)] private IPlant existingCrop;
        private DateTime StartDate;
        private DateTime EndDate;
        private double TopDUL;
        private double TopLL;
        private int nLayers;
        [Link]
        private IPhysical soilPhysical;
        [Link]
        private ISoilWater waterBalance;
        //Communication to other modules
       
        //User inputs from properties tab
        [Description("Turn irrigation on?")]
        public bool allowIrrigation { get; set; }
        [Description("Start of irrigation season (dd-MMM)")]
        public string seasonStart { get; set; }
        [Description("End of irrigation season (dd-MMM)")]
        public string seasonEnd { get; set; }
        [Description("Season allocation (mm)")]
        public double seasonsAllocation { get; set; }
        [Description("Deficit to trigger irrigation (% PAWC)")]
        public double triggerDeficit { get; set; }
        [Description("Deficit to stop irrigaton (% PAWC)")]
        public double targetDeficit { get; set; }
        [Description("Minimum days for irrigation to return")]
        public double returndays { get; set; }
        [Description("Maximum irrigation application (mm/day)")]
        public double maximumAmount { get; set; }
        [Description("Depth to calculate PAWC (mm)")]
        public double depthPAWC { get; set; }

        //Class members
        [JsonIgnore] public double TopSWdeficit { get; set; }
        [JsonIgnore] public double TopSWC { get; set; }
        [JsonIgnore] public double DaysSinceIrrigation { get; set; }
        [JsonIgnore] public double AmountToApply { get; set; }
        [JsonIgnore] public double SeasonAppliedAmount { get; set; }
        
        private bool IrrigationIsAllowed { get; set; }
        private bool SeasonIsOpen { get; set; }
        private bool CropIsActive { get; set; }
        private bool IrrigatorIsAvailable { get; set; }
        private bool SoilIsDry { get; set; }

    
        //Calculate static soil variables
        [EventSubscribe("StartOfSimulation")]
        private void OnStartOfSimulation(object sender, EventArgs e)
        {   
            //Set the season dates
            StartDate = DateTime.Parse(seasonStart + "-" + Clock.Today.Year.ToString());
            EndDate = DateTime.Parse(seasonEnd + "-" + Clock.Today.Year.ToString());
            
            //Can we irrigate at all?
            IrrigationIsAllowed = false; 
            if (allowIrrigation)
                IrrigationIsAllowed = true; 

            //Calculate soil water variables
            double depthFromSurface = 0.0;
            double fracLayer = 0.0;
            nLayers = soilPhysical.Thickness.Length;
            TopLL = 0;
            TopDUL = 0;
            depthFromSurface = 0;
            for (int layer = 0; layer < nLayers; layer++)
            {
                fracLayer = Math.Min(1.0, (depthPAWC - depthFromSurface) / soilPhysical.Thickness[layer]);
                TopLL += soilPhysical.LL15mm[layer] * fracLayer;
                TopDUL += soilPhysical.DULmm[layer] * fracLayer;
                depthFromSurface += soilPhysical.Thickness[layer];
                if (depthFromSurface >= depthPAWC)
                    layer = nLayers;
            }
        }
             
        //Determine daily requirement for irrigation
        [EventSubscribe("StartOfDay")]
        private void OnStartOfDay(object sender, EventArgs e)
        {
            //Can we irrigate today?          
            SeasonIsOpen = isBetween(Clock.Today, StartDate, EndDate);

            //Is there a crop in the ground that needs irrigation?
            CropIsActive = false;
            if ((existingCrop != null) && (existingCrop.IsAlive))
                CropIsActive = true;
            //if ((existingCrop.Phenology.Stage >= 3.0) && (existingCrop.Phenology.Stage < 6.0))
          
            //Is the irrigator available?
            IrrigatorIsAvailable = false;
            DaysSinceIrrigation += 1;
            if (DaysSinceIrrigation >= returndays)
                IrrigatorIsAvailable = true;
          
            //Is the soil dry enough to require irrigation?
            SoilIsDry = false;
            double depthFromSurface = 0.0;
            double fracLayer = 0.0;
            TopSWC = 0.0;
            for (int layer = 0; layer < nLayers; layer++)
            //for (int layer = 0; depthFromSurface < depthPAWC + soilPhysical.Thickness[layer]; layer++)
            {
                fracLayer = Math.Min(1.0, (depthPAWC - depthFromSurface) / soilPhysical.Thickness[layer]);
                TopSWC += waterBalance.SWmm[layer] * fracLayer;
                depthFromSurface += soilPhysical.Thickness[layer];
                if (depthFromSurface >= depthPAWC)
                    layer = nLayers;
            }
            
            TopSWdeficit = TopSWC - TopDUL;
            if (Math.Max(0.0, -TopSWdeficit) >= (TopDUL - TopLL) * (100 - triggerDeficit) / 100)
                SoilIsDry = true;
                
            //Are all the conditions ratifying irrigation
            if (IrrigationIsAllowed && SeasonIsOpen && CropIsActive && IrrigatorIsAvailable && SoilIsDry)
            {
                //Lets bloody well irrigate then!!!!
                AmountToApply = TopDUL * targetDeficit / 100 - TopSWC;
                AmountToApply = Math.Max(0.0, Math.Min(AmountToApply, seasonsAllocation - SeasonAppliedAmount));
                Irrigation.Apply(AmountToApply);
                DaysSinceIrrigation = 0;
                SeasonAppliedAmount += AmountToApply;
            }
        }
        
        ///Checks whether theDate is between iniDate and endDate (non-year specific)
        private bool isBetween(DateTime theDay, DateTime iniDate, DateTime endDate)
        {
            bool result = false;
            if (iniDate.DayOfYear < endDate.DayOfYear)
            {
                // period is within one year, ex: summer in the northern hemisphere
                if ((theDay.DayOfYear >= iniDate.DayOfYear) && (theDay.DayOfYear <= endDate.DayOfYear))
                    result = true;
            }
            else
            {
                // period goes over the end of the year, ex: summer in the southern hemisphere
                if ((theDay.DayOfYear >= iniDate.DayOfYear) || (theDay.DayOfYear <= endDate.DayOfYear))
                    result = true;
            }
            
            return result;
        }
    }
}
```
      MicroClimate: a_interception=0; b_interception=1; c_interception=0; d_interception=0; SoilHeatFluxFraction=0.4; MinimumHeightDiffForNewLayer=0; NightInterceptionFraction=0.5; ReferenceHeight=2
      Irrigation
      Fertiliser
      SurfaceOrganicMatter: InitialResidueName=Sward; InitialResidueType=grass; InitialResidueMass=1000; InitialStandingFraction=0; InitialCPR=0; InitialCNR=15
      PastureSpecies AGPKikuyu: doyGermination=275; daysEmergenceToAnthesis=120; daysAnthesisToMaturity=85; degreesDayForAnthesis=1100; degreesDayForMaturity=900; daysAnnualsFactor=45; CanopyType=PastureSpecies; InitialShootDM=3000; InitialRootDM=800; InitialRootDepth=750; initialDMFractionsGrasses=[0.15, 0.25, 0.25, 0.05, 0.05, 0.1, 0.1, 0.05, 0, 0, 0]; initialDMFractionsForbs=[0.2, 0.2, 0.15, 0.05, 0.1, 0.15, 0.1, 0.05, 0, 0, 0]; PhotosyntheticEfficiency=0.01; PhotosynthesisCurveFactor=0.8; FractionPAR=0.5; ReferenceCO2=380; CO2EffectScaleFactor=700; CO2EffectOffsetFactor=600; CO2EffectMinimum=0.7; CO2EffectExponent=2; ReproSeasonDurationCoeff=2; ReproSeasonShouldersLengthFactor=1; ReproSeasonOnsetDurationFactor=0.6; RelativeTurnoverEmerging=2; DetachmentDroughtCoefficient=3; DetachmentDroughtEffectMin=0.1; TurnoverStockFactor=0.01; TurnoverDefoliationEffectMin=0.025; MinimumGreenLeafProp=0.8; MinimumGreenRootProp=0.5
        initialDMFractionsLegumes=[0.16, 0.23, 0.22, 0.05, 0.03, 0.05, 0.05, 0.01, 0.04, 0.08, 0.08]
        LinearInterpolationFunction FVPDFunction
      Soil SoilDalby: ASCOrder=Vertosol; ASCSubOrder=Black; SoilType=Clay; Site=Norwin; NearestTown=Norwin; Region=Darling Downs and Granite Belt; State=Queensland; Country=Australia; NaturalVegetation=Qld. Bluegrass, possible Qld. Blue gum; ApsoilNumber=900; Latitude=-27.581836; Longitude=151.320206; LocationAccuracy=+/- 20m
        DataSource=CSIRO Sustainable Ecosystems, Toowoomba; Characteriesd as part of the GRDC funded project"Doing it better, doing it smarter, managing soil water in Australian agriculture' 2011
        Comments=OC, CLL for all crops estimated-based on Bongeen Mywybilla Soil No1
        Physical
          Thickness  BD       AirDry   LL15      DUL       SAT       KS
          150        1.01056  0.13025  0.2605    0.521     0.588655  20
          150        1.07146  0.01     0.248362  0.496723  0.565677  20
          300        1.09394  0.01     0.28      0.488438  0.557193  20
          300        1.15861  0.01     0.28      0.480297  0.532787  20
          300        1.17301  0.01     0.28      0.471584  0.527354  20
          300        1.16287  0.01     0.28      0.457071  0.53118   20
          300        1.1875   0.01     0.28      0.452332  0.521888  20
          SoilCrop AGPKikuyuSoil: LL=[0.15, 0.16, 0.15, 0.05, 0.04, 0.03, 0.03]; KL=[0.02, 0.07, 0.09, 0.08, 0.07, 0.07, 0.05]; XF=[1, 1, 1, 1, 1, 1, 1]
          SoilCrop AGPRyegrassSoil: LL=[0.15, 0.14, 0.06, 0.02, 0.01, 0.01, 0.01]; KL=[0.1, 0.1, 0.08, 0.04, 0.01, 0, 0]; XF=[1, 1, 1, 1, 1, 0, 0]
        WaterBalance SoilWater: SummerDate=1-Nov; SummerU=5; SummerCona=5; WinterDate=1-Apr; WinterU=5; WinterCona=5; DiffusConst=40; DiffusSlope=16; Salb=0.12; CN2Bare=73; CNRed=20; CNCov=0.8; PSIDul=-100; Thickness=[150, 150, 300, 300, 300, 300, 300]; SWCON=[0.3, 0.3, 0.3, 0.3, 0.3, 0.3, 0.3]
        Organic: FOMCNRatio=40; CarbonUnits=Total
          Thickness  Carbon  SoilCNRatio  FBiom  FInert  FOM
          150        1.2     12           0.04   0.4     347.129
          150        0.96    12           0.02   0.6     270.344
          300        0.6     12           0.02   0.8     163.972
          300        0.3     12           0.02   1       99.4541
          300        0.18    12           0.01   1       60.322
          300        0.12    12           0.01   1       36.5871
          300        0.12    12           0.01   1       22.1912
        Chemical: Thickness=[150, 150, 300, 300, 300, 300, 300]; PH=[8, 8, 8, 8, 8, 8, 8]; PHUnits=Water
        Water: Thickness=[150, 150, 300, 300, 300, 300, 300]; InitialPAWmm=361.245; RelativeTo=LL15; FilledFromTop=false
          InitialValues=[0.521, 0.496723, 0.488438, 0.480297, 0.471584, 0.457071, 0.452332]
        Nutrient
        Solute NO3: Thickness=[150, 150, 300, 300, 300, 300, 300]; InitialValues=[1, 1, 1, 1, 1, 1, 1]; InitialValuesUnits=ppm; WaterTableConcentration=0; D0=0; DepthConstant=0; MaxDepthSoluteAccessible=0; RunoffEffectivenessAtMovingSolute=0; MaxEffectiveRunoff=0
        Solute NH4: Thickness=[150, 150, 300, 300, 300, 300, 300]; InitialValues=[0.1, 0.1, 0.1, 0.1, 0.1, 0.1, 0.1]; InitialValuesUnits=ppm; WaterTableConcentration=0; D0=0; DepthConstant=0; MaxDepthSoluteAccessible=0; RunoffEffectivenessAtMovingSolute=0; MaxEffectiveRunoff=0
        Solute Urea: Thickness=[150, 150, 300, 300, 300, 300, 300]; InitialValues=[0, 0, 0, 0, 0, 0, 0]; InitialValuesUnits=kg/ha; WaterTableConcentration=0; D0=0; DepthConstant=0; MaxDepthSoluteAccessible=0; RunoffEffectivenessAtMovingSolute=0; MaxEffectiveRunoff=0
        SoilTemperature Temperature
      Report: EventNames=[Clock].EndOfDay
        VariableNames:
          [Clock].Today as Date
          // These examples are set up for Ryegrass and WhiteClover so add in any other species as needed for your simulation
          // The format of AggregationType (variable) from [Report].DayAfterLastOutput to [Clock].Today is used so that when the reporting frequency is changed the outputs are still sensible
          // If the name of the Report component ("Report") here is changed in the simulation tree then all the references to that name in the outputs below also need to be changed
          // If all you want is an annual pattern of harvested pasture based on the production year (July to June)  ....
          [AGPKikuyu].HarvestedWt
          Sum of ([SimpleGrazing].GrazedDM) from 1-Jul to [Clock].Today as AnnualHarv
          [SimpleGrazing].GrazedDM
          [SimpleGrazing].AmountDungWtReturned
          [SimpleGrazing].AmountDungNReturned
          [SimpleGrazing].AmountUrineNReturned
          [MicroClimate].RadiationInterception
          [Weather].Radn
          ([SimpleGrazing].AmountDungNReturned+[SimpleGrazing].AmountUrineNReturned) as NReturned
          [SimpleGrazing].AmountDungWtReturned as CReturned
          ([AGPKikuyu].AboveGroundDeadWt/[AGPKikuyu].AboveGroundLiveWt) as DeadProportion
          [AGPKikuyu].CoverTotal
          [AGPKikuyu].CoverGreen
          [AGPKikuyu].CoverDead
          [AGPKikuyu].AboveGroundWt
          [AGPKikuyu].AboveGroundDeadWt
    Forages
      Parameters:
        Name                          LiveDigestibility  DeadDigestibility  LiveFractionConsumable  DeadFractionConsumable  LiveMinimumBiomass  DeadMinimumBiomass
        SurfaceOrganicMatter.Residue  0.7                0.3                1                       1                       100                 0
        AGPKikuyu.Leaf                FromModel          FromModel          1                       1                       100                 0
        AGPKikuyu.Stem                FromModel          FromModel          1                       1                       100                 0
        AGPKikuyu.Stolon              FromModel          FromModel          1                       1                       100                 0
  Simulation TargetMass
    Clock: Start=1980-07-01; End=1982-07-30
    Weather: FileName=%root%/Examples/WeatherFiles/AU_Dalby.met; Latitude=-27.18; Tav=19.09; Amp=14.63
    SoilArbitrator
    Summary
    Zone Field: Area=1; Slope=0; AspectAngle=0; Altitude=50
      SimpleGrazing: GrazingRotationType=1; SimpleMinGrazable=3500; SimpleGrazingResidual=2000; PreGrazeDMArray=[3500]; PostGrazeDMArray=[2000]; FlexibleGrazePostDM=0; NoGrazingStartString=01-jun; NoGrazingEndString=15-sep; FractionDefoliatedBiomassToSoil=[1]; FractionDefoliatedNToSoil=[0.25]; FractionExcretedNToDung=[0.3]; DepthUrineIsAdded=10; SendDungElsewhere=0; SendUrineElsewhere=0; UsePatching=false; PseudoPatches=false; ZoneCount=20; UrineReturnPattern=0; PseudoRandomSeed=0; FractionPopulationDecline=0; TramplingOn=false; MaximumPropLitterMovedToSoil=0.1; PastureConsumedAtMaximumRateOfLitterRemoval=1200
      Manager FertiliseFixedDates: same as SimpleRotation.Field.FertiliseFixedDates
      Manager AutomaticIrrigation
        allowIrrigation = True
        seasonStart = 1-sep
        seasonEnd = 30-aug
        seasonsAllocation = 100000
        triggerDeficit = 90
        targetDeficit = 95
        returndays = 1
        maximumAmount = 300
        depthPAWC = 100
```csharp
using Newtonsoft.Json;
using APSIM.Shared.Utilities;
using System.Xml.Serialization;
using Models.Soils;
using Models.PMF;
using Models.Core;
using System.Linq;
using System;
using Models.Interfaces;

        
namespace Models
{
    [Serializable] 
    [System.Xml.Serialization.XmlInclude(typeof(Model))]
    public class Script : Model
    {
        [Link] private ISummary summary;
        [Link] private Irrigation Irrigation;
        [Link] private Clock Clock;
        [Link] private Soil Soil;
        [Link(IsOptional = true)] private IPlant existingCrop;
        private DateTime StartDate;
        private DateTime EndDate;
        private double TopDUL;
        private double TopLL;
        private int nLayers;
        [Link]
        private IPhysical soilPhysical;
        [Link]
        private ISoilWater waterBalance;
        //Communication to other modules
       
        //User inputs from properties tab
        [Description("Turn irrigation on?")]
        public bool allowIrrigation { get; set; }
        [Description("Start of irrigation season (dd-MMM)")]
        public string seasonStart { get; set; }
        [Description("End of irrigation season (dd-MMM)")]
        public string seasonEnd { get; set; }
        [Description("Season allocation (mm)")]
        public double seasonsAllocation { get; set; }
        [Description("Deficit to trigger irrigation (% PAWC)")]
        public double triggerDeficit { get; set; }
        [Description("Deficit to stop irrigaton (% PAWC)")]
        public double targetDeficit { get; set; }
        [Description("Minimum days for irrigation to return")]
        public double returndays { get; set; }
        [Description("Maximum irrigation application (mm/day)")]
        public double maximumAmount { get; set; }
        [Description("Depth to calculate PAWC (mm)")]
        public double depthPAWC { get; set; }

        //Class members
        [JsonIgnore] public double TopSWdeficit { get; set; }
        [JsonIgnore] public double TopSWC { get; set; }
        [JsonIgnore] public double DaysSinceIrrigation { get; set; }
        [JsonIgnore] public double AmountToApply { get; set; }
        [JsonIgnore] public double SeasonAppliedAmount { get; set; }
        
        private bool IrrigationIsAllowed { get; set; }
        private bool SeasonIsOpen { get; set; }
        private bool CropIsActive { get; set; }
        private bool IrrigatorIsAvailable { get; set; }
        private bool SoilIsDry { get; set; }

    
        //Calculate static soil variables
        [EventSubscribe("StartOfSimulation")]
        private void OnStartOfSimulation(object sender, EventArgs e)
        {   
            //Set the season dates
            StartDate = DateTime.Parse(seasonStart + "-" + Clock.Today.Year.ToString());
            EndDate = DateTime.Parse(seasonEnd + "-" + Clock.Today.Year.ToString());
            
            //Can we irrigate at all?
            IrrigationIsAllowed = false; 
            if (allowIrrigation)
                IrrigationIsAllowed = true; 

            //Calculate soil water variables
            double depthFromSurface = 0.0;
            double fracLayer = 0.0;
            nLayers = soilPhysical.Thickness.Length;
            for (int layer = 0; layer < nLayers; layer++)
            {
                fracLayer = Math.Min(1.0, (depthPAWC - depthFromSurface) / soilPhysical.Thickness[layer]);
                TopLL += soilPhysical.LL15mm[layer] * fracLayer;
                TopDUL += soilPhysical.DULmm[layer] * fracLayer;
                depthFromSurface += soilPhysical.Thickness[layer];
                if (depthFromSurface >= depthPAWC)
                    layer = nLayers;
            }
        }
             
        //Determine daily requirement for irrigation
        [EventSubscribe("StartOfDay")]
        private void OnStartOfDay(object sender, EventArgs e)
        {
            //Can we irrigate today?          
            SeasonIsOpen = isBetween(Clock.Today, StartDate, EndDate);

            //Is there a crop in the ground that needs irrigation?
            CropIsActive = false;
            if ((existingCrop != null) && (existingCrop.IsAlive))
                CropIsActive = true;
            //if ((existingCrop.Phenology.Stage >= 3.0) && (existingCrop.Phenology.Stage < 6.0))
          
            //Is the irrigator available?
            IrrigatorIsAvailable = false;
            DaysSinceIrrigation += 1;
            if (DaysSinceIrrigation >= returndays)
                IrrigatorIsAvailable = true;
          
            //Is the soil dry enough to require irrigation?
            SoilIsDry = false;
            double depthFromSurface = 0.0;
            double fracLayer = 0.0;
            TopSWC = 0.0;
            for (int layer = 0; layer < nLayers; layer++)
            //for (int layer = 0; depthFromSurface < depthPAWC + soilPhysical.Thickness[layer]; layer++)
            {
                fracLayer = Math.Min(1.0, (depthPAWC - depthFromSurface) / soilPhysical.Thickness[layer]);
                TopSWC += waterBalance.SWmm[layer] * fracLayer;
                depthFromSurface += soilPhysical.Thickness[layer];
                if (depthFromSurface >= depthPAWC)
                    layer = nLayers;
            }
            
            TopSWdeficit = TopSWC - TopDUL;
            if (Math.Max(0.0, -TopSWdeficit) >= (TopDUL - TopLL) * (100 - triggerDeficit) / 100)
                SoilIsDry = true;
                
            //Are all the conditions ratifying irrigation
            if (IrrigationIsAllowed && SeasonIsOpen && CropIsActive && IrrigatorIsAvailable && SoilIsDry)
            {
                //Lets bloody well irrigate then!!!!
                AmountToApply = TopDUL * targetDeficit / 100 - TopSWC;
                AmountToApply = Math.Max(0.0, Math.Min(AmountToApply, seasonsAllocation - SeasonAppliedAmount));
                Irrigation.Apply(AmountToApply);
                DaysSinceIrrigation = 0;
                SeasonAppliedAmount += AmountToApply;
            }
        }
        
        ///Checks whether theDate is between iniDate and endDate (non-year specific)
        private bool isBetween(DateTime theDay, DateTime iniDate, DateTime endDate)
        {
            bool result = false;
            if (iniDate.DayOfYear < endDate.DayOfYear)
            {
                // period is within one year, ex: summer in the northern hemisphere
                if ((theDay.DayOfYear >= iniDate.DayOfYear) && (theDay.DayOfYear <= endDate.DayOfYear))
                    result = true;
            }
            else
            {
                // period goes over the end of the year, ex: summer in the southern hemisphere
                if ((theDay.DayOfYear >= iniDate.DayOfYear) || (theDay.DayOfYear <= endDate.DayOfYear))
                    result = true;
            }
            
            return result;
        }
    }
}
```
      MicroClimate: a_interception=0; b_interception=1; c_interception=0; d_interception=0; SoilHeatFluxFraction=0.4; MinimumHeightDiffForNewLayer=0; NightInterceptionFraction=0.5; ReferenceHeight=2
      Irrigation
      Fertiliser
      SurfaceOrganicMatter: InitialResidueName=Sward; InitialResidueType=grass; InitialResidueMass=1000; InitialStandingFraction=0; InitialCPR=0; InitialCNR=15
      PastureSpecies AGPKikuyu: same as SimpleRotation.Field.AGPKikuyu
      Soil SoilDalby: same as SimpleRotation.Field.SoilDalby
      Report: EventNames=[Clock].EndOfDay
        VariableNames:
          [Clock].Today as Date
          // These examples are set up for Ryegrass and WhiteClover so add in any other species as needed for your simulation
          // The format of AggregationType (variable) from [Report].DayAfterLastOutput to [Clock].Today is used so that when the reporting frequency is changed the outputs are still sensible
          // If the name of the Report component ("Report") here is changed in the simulation tree then all the references to that name in the outputs below also need to be changed
          // If all you want is an annual pattern of harvested pasture based on the production year (July to June)  ....
          [AGPKikuyu].HarvestedWt
          Sum of ([SimpleGrazing].GrazedDM) from 1-Jul to [Clock].Today as AnnualHarv
          [SimpleGrazing].GrazedDM
          [SimpleGrazing].AmountDungWtReturned
          [SimpleGrazing].AmountDungNReturned
          [SimpleGrazing].AmountUrineNReturned
          [MicroClimate].RadiationInterception
          [Weather].Radn
          ([SimpleGrazing].AmountDungNReturned+[SimpleGrazing].AmountUrineNReturned) as NReturned
          [SimpleGrazing].AmountDungWtReturned as CReturned
          ([AGPKikuyu].AboveGroundDeadWt/[AGPKikuyu].AboveGroundLiveWt) as DeadProportion
          [AGPKikuyu].CoverTotal
          [AGPKikuyu].CoverGreen
          [AGPKikuyu].CoverDead
          [AGPKikuyu].AboveGroundWt
          [AGPKikuyu].AboveGroundDeadWt
    Forages: same as SimpleRotation.Forages
  Simulation TimingControlledElsewhere
    Clock: Start=1980-07-01; End=1982-07-30
    Weather: FileName=%root%/Examples/WeatherFiles/AU_Dalby.met; Latitude=-27.18; Tav=19.09; Amp=14.63
    SoilArbitrator
    Summary
    Zone Field: Area=1; Slope=0; AspectAngle=0; Altitude=50
      Operations Grazing
        1980-10-15  [SimpleGrazing].GrazeToResidual(1500)
        1980-12-15  [SimpleGrazing].GrazeToResidual(2000)
        1980-12-30  [SimpleGrazing].GrazeToResidual(1000)
        1981-01-25  [SimpleGrazing].GrazeToResidual(3000)
      SimpleGrazing: GrazingRotationType=2; SimpleMinGrazable=3500; SimpleGrazingResidual=2000; FlexibleGrazePostDM=0; MinimumRotationLengthArray=[5, 5, 5, 5, 5, 5, 5, 5, 5, 5, 5, 5]; FractionDefoliatedBiomassToSoil=[1]; FractionDefoliatedNToSoil=[0.25]; FractionExcretedNToDung=[0.3]; DepthUrineIsAdded=10; SendDungElsewhere=0; SendUrineElsewhere=0; UsePatching=false; PseudoPatches=false; ZoneCount=20; UrineReturnPattern=0; PseudoRandomSeed=0; FractionPopulationDecline=0; TramplingOn=false; MaximumPropLitterMovedToSoil=0.1; PastureConsumedAtMaximumRateOfLitterRemoval=1200
        PreGrazeDMArray=[3500, 3500, 3500, 3500, 3500, 3500, 3500, 3500, 3500, 3500, 3500, 3500]
        PostGrazeDMArray=[2000, 2000, 2000, 2000, 2000, 2000, 2000, 2000, 2000, 2000, 2000, 2000]
      Manager FertiliseFixedDates: same as SimpleRotation.Field.FertiliseFixedDates
      Manager AutomaticIrrigation: same as TargetMass.Field.AutomaticIrrigation
      MicroClimate: a_interception=0; b_interception=1; c_interception=0; d_interception=0; SoilHeatFluxFraction=0.4; MinimumHeightDiffForNewLayer=0; NightInterceptionFraction=0.5; ReferenceHeight=2
      Irrigation
      Fertiliser
      SurfaceOrganicMatter: InitialResidueName=Sward; InitialResidueType=grass; InitialResidueMass=1000; InitialStandingFraction=0; InitialCPR=0; InitialCNR=15
      PastureSpecies AGPKikuyu: same as SimpleRotation.Field.AGPKikuyu
      Soil SoilDalby: same as SimpleRotation.Field.SoilDalby
      Report: same as TargetMass.Field.Report
    Forages: same as SimpleRotation.Forages
  Simulation FlexibleGrazingCover
    Clock: Start=1980-07-01; End=1982-07-30
    Weather: FileName=%root%/Examples/WeatherFiles/AU_Dalby.met; Latitude=-27.18; Tav=19.09; Amp=14.63
    SoilArbitrator
    Summary
    Zone Field: Area=1; Slope=0; AspectAngle=0; Altitude=50
      SimpleGrazing: GrazingRotationType=3; SimpleMinGrazable=3500; SimpleGrazingResidual=2000; FlexibleExpressionForTimingOfGrazing=AGPKikuyu.CoverTotal > 0.95; FlexibleGrazePostDM=2000; FractionDefoliatedBiomassToSoil=[1]; FractionDefoliatedNToSoil=[0.25]; FractionExcretedNToDung=[0.3]; DepthUrineIsAdded=10; SendDungElsewhere=0; SendUrineElsewhere=0; UsePatching=false; PseudoPatches=false; ZoneCount=20; UrineReturnPattern=0; PseudoRandomSeed=0; FractionPopulationDecline=0; TramplingOn=false; MaximumPropLitterMovedToSoil=0.1; PastureConsumedAtMaximumRateOfLitterRemoval=1200
        PreGrazeDMArray=[3500, 3500, 3500, 3500, 3500, 3500, 3500, 3500, 3500, 3500, 3500, 3500]
        PostGrazeDMArray=[2000, 2000, 2000, 2000, 2000, 2000, 2000, 2000, 2000, 2000, 2000, 2000]
      Manager FertiliseFixedDates: same as SimpleRotation.Field.FertiliseFixedDates
      Manager AutomaticIrrigation: same as TargetMass.Field.AutomaticIrrigation
      MicroClimate: a_interception=0; b_interception=1; c_interception=0; d_interception=0; SoilHeatFluxFraction=0.4; MinimumHeightDiffForNewLayer=0; NightInterceptionFraction=0.5; ReferenceHeight=2
      Irrigation
      Fertiliser
      SurfaceOrganicMatter: InitialResidueName=Sward; InitialResidueType=grass; InitialResidueMass=1000; InitialStandingFraction=0; InitialCPR=0; InitialCNR=15
      PastureSpecies AGPKikuyu: same as SimpleRotation.Field.AGPKikuyu
      Soil SoilDalby: same as SimpleRotation.Field.SoilDalby
      Report: same as TargetMass.Field.Report
    Forages: same as SimpleRotation.Forages
  Simulation Ryegrass_WhiteClover
    Clock: Start=1980-07-01; End=1982-06-30
    Weather: FileName=%root%/Examples/WeatherFiles/NZ_Lincoln.met; Latitude=-43.624; Tav=11.4; Amp=11.5
    SoilArbitrator
    Summary
    Zone Field: Area=1; Slope=0; AspectAngle=0; Altitude=50
      SimpleGrazing: GrazingRotationType=3; SimpleMinGrazable=1000; SimpleGrazingResidual=2000; FlexibleExpressionForTimingOfGrazing=(AGPRyegrass.AboveGroundWt+AGPWhiteClover.Standing.Wt)>3000; FlexibleGrazePostDM=1000; FractionDefoliatedBiomassToSoil=[1]; FractionDefoliatedNToSoil=[0.25]; FractionExcretedNToDung=[0.3]; DepthUrineIsAdded=10; SendDungElsewhere=0; SendUrineElsewhere=0; UsePatching=false; PseudoPatches=false; ZoneCount=20; UrineReturnPattern=0; PseudoRandomSeed=0; FractionPopulationDecline=0; TramplingOn=false; MaximumPropLitterMovedToSoil=0.1; PastureConsumedAtMaximumRateOfLitterRemoval=1200
        PreGrazeDMArray=[3200, 3200, 3200, 3200, 3200, 3200, 3200, 3200, 3200, 3200, 3200, 3200]
        PostGrazeDMArray=[1650, 1650, 1650, 1650, 1300, 1300, 1300, 1300, 1650, 1650, 1650, 1650]
      Manager FertiliseFixedDates
        EachYear = True
        Dates = 5-jan, 5-feb, 5-mar, 5-apr, 5-aug, 5-sep, 5-oct, 5-nov, 5-dec
        UseCritNThreshold = False
        CritNThreshold = 50
        CritNDepth = 75
        Depth = 50
        Amount = 15
        FertiliserType = UreaN
        script: same as in SimpleRotation.Field.FertiliseFixedDates
      Manager AutomaticIrrigation
        allowIrrigation = True
        seasonStart = 1-sep
        seasonEnd = 30-apr
        seasonsAllocation = 10000
        triggerDeficit = 75
        targetDeficit = 95
        returndays = 3
        maximumAmount = 30
        depthPAWC = 300
        script: same as in TargetMass.Field.AutomaticIrrigation
      MicroClimate: a_interception=0; b_interception=1; c_interception=0; d_interception=0; SoilHeatFluxFraction=0.4; MinimumHeightDiffForNewLayer=0; NightInterceptionFraction=0.5; ReferenceHeight=2
      Irrigation
      Fertiliser
      SurfaceOrganicMatter: InitialResidueName=Sward; InitialResidueType=grass; InitialResidueMass=1000; InitialStandingFraction=0; InitialCPR=0; InitialCNR=15
      Soil: SoilType=NZ_Sedimentary; LocalName=Lismore; Site=Winchmore; NearestTown=Ashburton; Region=Canterbury; Country=New Zealand; Latitude=-48.48; Longitude=0
        Chemical: Thickness=[150, 150, 200, 150, 250, 300, 300]; PH=[6, 6, 6, 6, 6, 6, 6]; PHUnits=Water
        Physical
          Thickness  ParticleSizeClay  BD    AirDry  LL15   DUL    SAT   KS
          150        20                1.3   0.05    0.15   0.36   0.45  5000
          150        15                1.35  0.01    0.14   0.34   0.43  2500
          200        12                1     0.01    0.055  0.19   0.25  3000
          150        8                 0.53  0.01    0.015  0.065  0.15  10000
          250        6                 0.31  0.01    0.01   0.04   0.11  17500
          300        5                 0.3   0.01    0.01   0.03   0.11  20000
          300        5                 0.3   0.01    0.01   0.03   0.11  20000
          SoilCrop AGPRyegrassSoil: LL=[0.15, 0.14, 0.06, 0.02, 0.01, 0.01, 0.01]; KL=[0.1, 0.1, 0.08, 0.04, 0.01, 0, 0]; XF=[1, 1, 1, 1, 1, 0, 0]
          SoilCrop AGPWhiteCloverSoil: LL=[0.15, 0.14, 0.06, 0.02, 0.01, 0.01, 0.01]; KL=[0.1, 0.1, 0.08, 0.04, 0.01, 0, 0]; XF=[1, 1, 1, 1, 1, 0, 0]
        WaterBalance SoilWater: SummerDate=1-Nov; SummerU=6; SummerCona=3.5; WinterDate=1-apr; WinterU=2; WinterCona=2; DiffusConst=88; DiffusSlope=35; Salb=0.13; CN2Bare=73; CNRed=20; CNCov=0.8; DischargeWidth=0; CatchmentArea=0; PSIDul=-100
          Thickness  SWCON  KLAT
          150        0.5    0
          150        0.52   0
          200        0.55   0
          150        0.6    0
          250        0.65   0
          300        0.65   0
          300        0.65   0
        Organic: FOMCNRatio=40; CarbonUnits=Total
          Thickness  Carbon  SoilCNRatio  FBiom  FInert  FOM
          150        3       12           0.04   0.5     331.337
          150        1       12           0.02   0.7     245.461
          200        0.6     12           0.02   0.83    164.537
          150        0.4     12           0.01   0.9     121.892
          250        0.25    12           0.01   0.95    73.9313
          300        0.15    12           0      0.99    40.5743
          300        0.1     12           0      0.99    22.2677
        Water: Thickness=[150, 150, 200, 150, 250, 300, 300]; InitialValues=[0.3495, 0.33, 0.18325, 0.0625, 0.0385, 0.029, 0.029]; InitialPAWmm=109.725; RelativeTo=LL15; FilledFromTop=false
        Nutrient
        Solute NO3: Thickness=[150, 150, 200, 150, 250, 300, 300]; InitialValues=[5, 2.5, 1, 0.75, 0.5, 0.5, 0.5]; InitialValuesUnits=ppm; WaterTableConcentration=0; D0=0; DepthConstant=0; MaxDepthSoluteAccessible=0; RunoffEffectivenessAtMovingSolute=0; MaxEffectiveRunoff=0
        Solute NH4: Thickness=[150, 150, 200, 150, 250, 300, 300]; InitialValues=[0.1, 0.1, 0.1, 0.1, 0.1, 0.1, 0.1]; InitialValuesUnits=ppm; WaterTableConcentration=0; D0=0; DepthConstant=0; MaxDepthSoluteAccessible=0; RunoffEffectivenessAtMovingSolute=0; MaxEffectiveRunoff=0
        Solute Urea: Thickness=[150, 150, 200, 150, 250, 300, 300]; InitialValues=[0, 0, 0, 0, 0, 0, 0]; InitialValuesUnits=kg/ha; WaterTableConcentration=0; D0=0; DepthConstant=0; MaxDepthSoluteAccessible=0; RunoffEffectivenessAtMovingSolute=0; MaxEffectiveRunoff=0
        SoilTemperature Temperature
      PastureSpecies AGPRyegrass: doyGermination=275; daysEmergenceToAnthesis=120; daysAnthesisToMaturity=85; degreesDayForAnthesis=1100; degreesDayForMaturity=900; daysAnnualsFactor=45; CanopyType=PastureSpecies; InitialShootDM=1500; InitialRootDM=450; InitialRootDepth=750; initialDMFractionsGrasses=[0.15, 0.25, 0.25, 0.05, 0.05, 0.1, 0.1, 0.05, 0, 0, 0]; initialDMFractionsForbs=[0.2, 0.2, 0.15, 0.05, 0.1, 0.15, 0.1, 0.05, 0, 0, 0]; PhotosyntheticEfficiency=0.01; PhotosynthesisCurveFactor=0.8; FractionPAR=0.5; ReferenceCO2=380; CO2EffectScaleFactor=700; CO2EffectOffsetFactor=600; CO2EffectMinimum=0.7; CO2EffectExponent=2; ReproSeasonDurationCoeff=2; ReproSeasonShouldersLengthFactor=1; ReproSeasonOnsetDurationFactor=0.6; RelativeTurnoverEmerging=2; DetachmentDroughtCoefficient=3; DetachmentDroughtEffectMin=0.1; TurnoverStockFactor=0.01; TurnoverDefoliationEffectMin=0.025; MinimumGreenLeafProp=0.8; MinimumGreenRootProp=0.5
        initialDMFractionsLegumes=[0.16, 0.23, 0.22, 0.05, 0.03, 0.05, 0.05, 0.01, 0.04, 0.08, 0.08]
        LinearInterpolationFunction FVPDFunction
      PastureSpecies AGPWhiteClover: doyGermination=275; daysEmergenceToAnthesis=120; daysAnthesisToMaturity=85; degreesDayForAnthesis=1100; degreesDayForMaturity=900; daysAnnualsFactor=45; CanopyType=PastureSpecies; InitialShootDM=500; InitialRootDM=150; InitialRootDepth=350; initialDMFractionsGrasses=[0.15, 0.25, 0.25, 0.05, 0.05, 0.1, 0.1, 0.05, 0, 0, 0]; initialDMFractionsForbs=[0.2, 0.2, 0.15, 0.05, 0.1, 0.15, 0.1, 0.05, 0, 0, 0]; PhotosyntheticEfficiency=0.01; PhotosynthesisCurveFactor=0.8; FractionPAR=0.5; ReferenceCO2=380; CO2EffectScaleFactor=700; CO2EffectOffsetFactor=600; CO2EffectMinimum=0.7; CO2EffectExponent=2; ReproSeasonDurationCoeff=2; ReproSeasonShouldersLengthFactor=1; ReproSeasonOnsetDurationFactor=0.6; RelativeTurnoverEmerging=2; DetachmentDroughtCoefficient=3; DetachmentDroughtEffectMin=0.1; TurnoverStockFactor=0.01; TurnoverDefoliationEffectMin=0.025; MinimumGreenLeafProp=0.8; MinimumGreenRootProp=0.5
        initialDMFractionsLegumes=[0.16, 0.23, 0.22, 0.05, 0.03, 0.05, 0.05, 0.01, 0.04, 0.08, 0.08]
        LinearInterpolationFunction FVPDFunction
      Report: EventNames=[Clock].EndOfDay
        VariableNames:
          [Clock].Today as Date
          Sum of ([SimpleGrazing].GrazedDM) from 1-Jul to [Clock].Today as HarvestedWt   //the amount harvested (kg DM /ha)
          //Sum of ([SimpleGrazing].AmountDungWtReturned) from 1-Jul to [Clock].Today as DungC
          //Sum of ([SimpleGrazing].AmountDungNReturned) from 1-Jul to [Clock].Today as DungN
          //Sum of ([SimpleGrazing].AmountUrineNReturned) from 1-Jul to [Clock].Today as UrineN
          [AGPRyegrass].CoverTotal+[AGPWhiteClover].CoverTotal as CoverTotal
          [AGPRyegrass].CoverTotal
          [AGPWhiteClover].CoverTotal
          [AGPRyegrass].CoverGreen+[AGPWhiteClover].CoverGreen as GreenTotal
          [AGPRyegrass].CoverGreen
          [AGPRyegrass].LAITotal+[AGPWhiteClover].LAITotal as LAI
          [AGPWhiteClover].CoverGreen
          ([AGPRyegrass].InterceptedRadn+[AGPWhiteClover].InterceptedRadn)/[Weather].Radn as CoverAGP_Weather
          [AGPRyegrass].AboveGroundWt+[AGPWhiteClover].Standing.Wt as ABG
          [MicroClimate].RadiationInterception as RadnIntercMM
          [AGPRyegrass].InterceptedRadn+[AGPWhiteClover].InterceptedRadn as RadnIntercAGP
          [SimpleGrazing].GrazedDM as GrazedDM
          [MicroClimate].CanopyCover
          [MicroClimate].RadiationInterception
          [Weather].Radn
    Forages
      Parameters:
        Name                          LiveDigestibility  DeadDigestibility  LiveFractionConsumable  DeadFractionConsumable  LiveMinimumBiomass  DeadMinimumBiomass
        SurfaceOrganicMatter.Residue  0.7                0.3                1                       1                       100                 0
        AGPRyegrass.Leaf              FromModel          FromModel          1                       1                       100                 0
        AGPRyegrass.Stem              FromModel          FromModel          1                       1                       100                 0
        AGPRyegrass.Stolon            FromModel          FromModel          1                       1                       100                 0
        AGPWhiteClover.Leaf           FromModel          FromModel          1                       1                       100                 0
        AGPWhiteClover.Stem           FromModel          FromModel          1                       1                       100                 0
        AGPWhiteClover.Stolon         FromModel          FromModel          1                       1                       100                 0
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