Simulations: Version=73
  DataStore
  Sobol: NumPaths=1000; ParametersHaveChanged=true
    Parameters:
      {Name=ResidueWt, Path=Field.SurfaceOrganicMatter.InitialResidueMass, LowerBound=0, UpperBound=5000}
      {Name=CN2, Path=Field.Soil.SoilWater.CN2Bare, LowerBound=70, UpperBound=85}
      {Name=Cona, Path=Field.Soil.SoilWater.SummerCona, LowerBound=3, UpperBound=9}
      {Name=U, Path=Field.Soil.SoilWater.SummerU, LowerBound=1, UpperBound=9}
      {Name=OC, Path=Field.Soil.Organic.Carbon[1], LowerBound=0.5, UpperBound=2}
      {Name=ResidueCNR, Path=Field.SurfaceOrganicMatter.InitialCNR, LowerBound=40, UpperBound=120}
      {Name=SWCon, Path=Field.Soil.SoilWater.SWCON[1], LowerBound=0.1, UpperBound=0.5}
      {Name=DiffusConst, Path=Field.Soil.SoilWater.DiffusConst, LowerBound=20, UpperBound=60}
      {Name=DiffusSlope, Path=Field.Soil.SoilWater.DiffusSlope, LowerBound=10, UpperBound=20}
    ParameterValues:
      V1          V2          V3          V4          V5          V6          V7         V8          V9
      3241.85864  74.12374    3.69161439  5.685792    1.92246354  72.36946    0.2137057  37.6743     14.33078
      1303.2312   82.93456    3.98395061  5.88239765  0.7157884   65.1535645  0.102903   53.5023079  13.3196774
      3418.513    80.36276    3.21892142  5.926468    1.20088243  66.5303345  0.304343   41.2614365  17.5589523
      619.949951  83.4452438  5.400676    2.30208254  0.6072504   52.70707    0.440332   58.404644   14.5023661
      752.9792    77.5987244  8.809521    7.641264    0.9657755   114.652267  0.150193   45.82287    15.6633291
      926.673157  80.4598     4.241898    6.58537865  1.91136825  76.21491    0.155301   22.8122253  14.4727983
      2337.62354  82.04019    8.711468    7.537527    1.35782647  72.44213    0.273882   24.6265411  19.5864
      4775.444    75.55889    5.61190128  2.19776368  1.92907417  72.06411    0.336962   27.5658932  14.589572
      4407.266    70.9409943  3.56418037  6.552801    0.573193    42.70791    0.356894   52.5001068  15.3883266
      3438.05518  83.99071    3.194207    4.362423    1.72303677  105.224586  0.478183   36.68571    19.708765
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    X1:
      X1          X2          X3          X4          X5          X6          X7         X8          X9
      3241.85864  74.12374    3.69161439  5.685792    1.92246354  72.36946    0.2137057  37.6743     14.33078
      1303.2312   82.93456    3.98395061  5.88239765  0.7157884   65.1535645  0.102903   53.5023079  13.3196774
      3418.513    80.36276    3.21892142  5.926468    1.20088243  66.5303345  0.304343   41.2614365  17.5589523
      619.949951  83.4452438  5.400676    2.30208254  0.6072504   52.70707    0.440332   58.404644   14.5023661
      752.9792    77.5987244  8.809521    7.641264    0.9657755   114.652267  0.150193   45.82287    15.6633291
      926.673157  80.4598     4.241898    6.58537865  1.91136825  76.21491    0.155301   22.8122253  14.4727983
      2337.62354  82.04019    8.711468    7.537527    1.35782647  72.44213    0.273882   24.6265411  19.5864
      4775.444    75.55889    5.61190128  2.19776368  1.92907417  72.06411    0.336962   27.5658932  14.589572
      4407.266    70.9409943  3.56418037  6.552801    0.573193    42.70791    0.356894   52.5001068  15.3883266
      3438.05518  83.99071    3.194207    4.362423    1.72303677  105.224586  0.478183   36.68571    19.708765
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    X2:
      X1          X2          X3          X4          X5          X6          X7          X8          X9
      3228.1875   81.44672    7.31345558  4.83011436  0.546793    52.3107376  0.2266599   21.7086926  11.0692091
      2004.33411  78.3108444  6.25016832  5.875719    1.08068538  83.28727    0.405563    31.4318886  19.6659641
      4154.97266  77.56122    7.10278     7.29146862  1.22793317  80.8318     0.18264167  46.059082   14.9707327
      1859.962    84.1465149  3.57692838  7.80274     0.9779381   78.94805    0.326198    34.3234024  19.1633224
      4022.36963  71.9833145  6.547226    4.451141    1.69672668  74.38411    0.295602    38.849205   19.3505478
      4396.165    78.43116    3.602172    4.598818    0.792204    98.89412    0.148872    25.20181    18.758091
      3780.661    77.49828    7.737766    5.10110474  1.31296527  114.545929  0.2669507   27.2961578  19.83777
      677.853455  75.23742    3.807814    3.47541356  1.16691732  87.02179    0.24579     45.2390022  12.2189169
      3115.18433  79.48018    8.9401      5.577763    1.95352376  96.2222748  0.3055193   50.7316933  12.1567869
      793.2008    70.31751    5.6853385   4.73265934  1.6975013   106.046631  0.459527    51.8931732  12.6960163
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    Simulation FallowSensitivityBase
      Clock: Start=1980-10-31; End=1990-12-31
      Summary SummaryFile
      Weather: FileName=%root%\Examples\WeatherFiles\Dalby.met
      SoilArbitrator
      Zone Field: Area=1; Slope=0; AspectAngle=0; Altitude=50
        Report: EventNames=[ResetAndOutput].Script.Reporting
          VariableNames:
            [Clock].Today
            [Clock].Today.Year
            Sum of [Weather].Rain from [ResetAndOutput].Script.Reseting to [ResetAndOutput].Script.Reporting as FallowRainfall
            Sum of [Soil].SoilWater.Es from [ResetAndOutput].Script.Reseting to [ResetAndOutput].Script.Reporting as FallowEvaporation
            Sum of [Soil].SoilWater.Runoff from [ResetAndOutput].Script.Reseting to [ResetAndOutput].Script.Reporting as FallowRunoff
            sum([Soil].SoilWater.SWmm) as TotalSW
            sum([Soil].SoilWater.ESW) as TotalESW
            (sum([Soil].Nutrient.NH4.kgha) + sum([Soil].Nutrient.NO3.kgha)) as TotalMinN
            [SurfaceOrganicMatter].Wt as FinalResidueWt
            [SurfaceOrganicMatter].Cover as FinalResidueCover
        Fertiliser
        Soil: ASCOrder=Vertosol; ASCSubOrder=Black; SoilType=Clay; Site=Norwin; NearestTown=Norwin; Region=Darling Downs and Granite Belt; State=Queensland; Country=Australia; NaturalVegetation=Qld. Bluegrass, possible Qld. Blue gum; ApsoilNumber=900; Latitude=-27.581836; Longitude=151.320206; LocationAccuracy=+/- 20m
          DataSource=CSIRO Sustainable Ecosystems, Toowoomba; Characteriesd as part of the GRDC funded project"Doing it better, doing it smarter, managing soil water in Australian agriculture' 2011
          Comments=OC, CLL for all crops estimated-based on Bongeen Mywybilla Soil No1
          Physical
            Thickness  BD       AirDry    LL15      DUL       SAT       KS
            150        1.01056  0.13025   0.2605    0.521     0.588655  20
            150        1.07146  0.198689  0.248362  0.496723  0.565677  20
            300        1.09394  0.28      0.28      0.488438  0.557193  20
            300        1.15861  0.28      0.28      0.480297  0.532787  20
            300        1.17301  0.28      0.28      0.471584  0.527354  20
            300        1.16287  0.28      0.28      0.457071  0.53118   20
            300        1.1875   0.28      0.28      0.452332  0.521888  20
            SoilCrop WheatSoil: LL=[0.261, 0.248, 0.28, 0.306, 0.36, 0.392, 0.446]; KL=[0.06, 0.06, 0.06, 0.04, 0.04, 0.02, 0.01]; XF=[1, 1, 1, 1, 1, 1, 1]
          SoilWater: SummerDate=1-Nov; SummerU=5; SummerCona=5; WinterDate=1-Apr; WinterU=5; WinterCona=5; DiffusConst=40; DiffusSlope=16; Salb=0.12; CN2Bare=73; CNRed=20; CNCov=0.8; max_pond=0; Thickness=[1800]; Depth=[0-180]; SWCON=[0.3]; PrecipitationInterception=0
          Organic: FOMCNRatio=40
            Thickness  Carbon  SoilCNRatio  FBiom  FInert  FOM
            150        1.2     12           0.04   0.4     347.129
            150        0.96    12           0.02   0.6     270.344
            300        0.6     12           0.02   0.8     163.972
            300        0.3     12           0.02   1       99.4541
            300        0.18    12           0.01   1       60.322
            300        0.12    12           0.01   1       36.5871
            300        0.12    12           0.01   1       22.1912
          Chemical
            Thickness  NO3N  NH4N  PH
            150        1     0.1   8
            150        1     0.1   8
            300        1     0.1   8
            300        1     0.1   8
            300        1     0.1   8
            300        1     0.1   8
            300        1     0.1   8
          InitialWater: PercentMethod=0; FractionFull=0; RelativeTo=WheatSoil
          Sample InitialN: Thickness=[150, 150, 300, 300, 300, 300, 300]; SWUnits=Volumetric; OCUnits=Total; PHUnits=Water
          CERESSoilTemperature
          Nutrient
            DirectedGraphInfo={Nodes=[{Name=Inert, OutlineColour=Black}, {Name=SurfaceResidue, OutlineColour=Black}, {Name=FOMLignin, OutlineColour=Black}, {Name=FOMCellulose, OutlineColour=Black}, {Name=FOMCarbohydrate, OutlineColour=Black}, {Name=Microbial, OutlineColour=Black}, {Name=Humic, OutlineColour=Black}, {Name=Urea, OutlineColour=Black}, {Name=NO3, OutlineColour=Black}, {Name=NH4, OutlineColour=Black}, {Name=Atmosphere, OutlineColour=White}, {Name=PlantAvailableNO3, OutlineColour=Black}, {Name=PlantAvailableNH4, OutlineColour=Black}], Arcs=[{SourceName=SurfaceResidue, DestinationName=Microbial}, {SourceName=SurfaceResidue, DestinationName=Humic}, {SourceName=FOMLignin, DestinationName=Microbial}, {SourceName=FOMLignin, DestinationName=Humic}, {SourceName=FOMCellulose, DestinationName=Microbial}, {SourceName=FOMCellulose, DestinationName=Humic}, {SourceName=FOMCarbohydrate, DestinationName=Microbial}, {SourceName=FOMCarbohydrate, DestinationName=Humic}, {SourceName=Microbial, DestinationName=Microbial}, {SourceName=Microbial, DestinationName=Humic}, {SourceName=Humic, DestinationName=Microbial}, {SourceName=Urea, DestinationName=NH4}, {SourceName=NO3, DestinationName=Atmosphere}, {SourceName=NH4, DestinationName=NO3}]}
        SurfaceOrganicMatter: InitialResidueName=wheat_stubble; InitialResidueType=wheat; InitialResidueMass=500; InitialStandingFraction=0; InitialCPR=0; InitialCNR=100; FractionFaecesAdded=0.5
        MicroClimate: a_interception=0; b_interception=1; c_interception=0; d_interception=0; soil_albedo=0.3; SoilHeatFluxFraction=0.4; NightInterceptionFraction=0.5; ReferenceHeight=2
        Manager ResetAndOutput
          OutputDate = 30-Apr
          ResetDate = 1-Nov
          ResetWater = Yes
          ResetN = Yes
          ResetSOM = Yes
```csharp
using System;
using Models.Core;
using Models.PMF;
using Models.Soils;
using Models.Soils.Nutrients;
using Models.Soils.Nutrients;
using Models.Interfaces;
using Models.Utilities;
using Models.Surface;
using APSIM.Shared.Utilities;
using Models.Report;

namespace Models
{
    [Serializable]
    public class Script : Model
    {
        [Link] Clock Clock;
        [Link] SoilWater SoilWater = null;
        [Link] INutrient Nutrient = null;
        [Link] SurfaceOrganicMatter SOM = null;
        [Link] Summary Summary;
        [Link] Report.Report Report;

        [Description("Date for output:")]
        public string OutputDate {get;set;}

        [Description("Date for reset:")]
        public string ResetDate {get;set;}

        [Description("Reset Water?")]
        public string ResetWater {get;set;}

        [Description("Reset Nitrogen?")]
        public string ResetN {get;set;}

        [Description("Reset Surface Organic Matter?")]
        public string ResetSOM {get;set;}

                /// <summary>Occurs when a plant is about to be harvested.</summary>
        public event EventHandler Reseting;
                /// <summary>Occurs when a plant is about to be harvested.</summary>
        public event EventHandler Reporting;


        [EventSubscribe("DoManagement")]
        private void OnDoManagement(object sender, EventArgs e)
        {
            if (DateUtilities.WithinDates(OutputDate, Clock.Today, OutputDate))
            {
               Reporting.Invoke(this, new EventArgs());
               //Report.DoOutput();
            }

            if (DateUtilities.WithinDates(ResetDate, Clock.Today, ResetDate))
            {
                if (ResetWater == "Yes")
                {
                    Summary.WriteMessage(this, "Reset Water");
                    SoilWater.Reset();
                }
                if (ResetN == "Yes")
                {
                    Summary.WriteMessage(this, "Reset Nitrogen");
                    Nutrient.Reset();
                }
                if (ResetSOM == "Yes")
                {
                    Summary.WriteMessage(this, "Reset Surface OM");
                    SOM.Reset();
                }

                Reseting.Invoke(this, new EventArgs());
            }
        }
    }
}
```
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