Simulations: Version=80
  Simulation
    Weather: FileName=%root%\Examples\WeatherFiles\Ingham.met
    Clock: Start=1990-01-01; End=2000-12-31
    Summary summaryfile
    MicroClimate: a_interception=0; b_interception=1; c_interception=0; d_interception=0; soil_albedo=0.23; SoilHeatFluxFraction=0.4; MinimumHeightDiffForNewLayer=0; NightInterceptionFraction=0.5; ReferenceHeight=2
    Zone Field: Area=1; Slope=0; AspectAngle=0; Altitude=50
      SurfaceOrganicMatter: InitialResidueName=wheat_stubble; InitialResidueType=wheat; InitialResidueMass=0; InitialStandingFraction=0; InitialCPR=0; InitialCNR=80; FractionFaecesAdded=1
      Soil: SoilType=Black Vertosol; Site=Jimbour; NearestTown=Jimbour, Q 4352; Region=South East Queensland; NaturalVegetation=Grassland, mainly Qld bluegrass; Latitude=0; Longitude=0
        InitialWater Initial water: PercentMethod=0; FractionFull=0
        Physical
          Thickness  BD    AirDry  LL15  DUL   SAT
          150        1.02  0.14    0.29  0.54  0.59
          150        1.03  0.26    0.29  0.53  0.58
          300        1.02  0.29    0.29  0.54  0.59
          300        1.02  0.29    0.29  0.54  0.58
          300        1.06  0.3     0.3   0.52  0.57
          300        1.11  0.31    0.31  0.5   0.55
          300        1.12  0.32    0.32  0.5   0.55
          300        1.15  0.33    0.33  0.48  0.53
          300        1.18  0.34    0.34  0.47  0.52
          300        1.2   0.35    0.35  0.46  0.51
          300        1.25  0.36    0.36  0.44  0.49
          SoilCrop SugarcaneSoil
            LL=[0.29, 0.29, 0.32, 0.32, 0.35, 0.38, 0.41, 0.48, 0.47, 0.46, 0.44]
            KL=[0.1, 0.1, 0.08, 0.06, 0.04, 0.02, 0.01, 0, 0, 0, 0]
            XF=[1, 1, 1, 1, 1, 1, 1, 0, 0, 0, 0]
        SoilWater: SummerDate=1-Nov; SummerU=6; SummerCona=3.5; WinterDate=1-Apr; WinterU=6; WinterCona=3.5; DiffusConst=40; DiffusSlope=16; Salb=0.13; CN2Bare=73; CNRed=20; CNCov=0.8; slope=0; discharge_width=0; catchment_area=0; max_pond=0; Thickness=[150, 150, 300, 300, 300, 300, 300, 300, 300, 300, 300]; SWCON=[0.3, 0.3, 0.3, 0.3, 0.3, 0.3, 0.3, 0.3, 0.3, 0.3, 0.3]; PrecipitationInterception=0
        Organic: FOMCNRatio=40
          Thickness  Carbon  SoilCNRatio  FBiom  FInert  FOM
          150        1.04    12.5         0.025  0.4     48.1286
          150        0.89    12.5         0.02   0.6     41.4247
          300        0.89    12.5         0.015  0.8     30.6882
          300        0.89    12.5         0.01   0.9     22.7344
          300        0.77    12.5         0.01   0.95    16.842
          300        0.45    12.5         0.01   0.95    12.4769
          300        0.27    12.5         0.01   0.95    9.2431
          300        0.22    12.5         0.01   0.95    6.84746
          300        0.16    12.5         0.01   0.95    5.07272
          300        0.13    12.5         0.01   0.95    3.75796
          300        0.12    12.5         0.01   0.95    2.78397
        Chemical
          Thickness  NO3N  NH4N  PH
          150        6.5   0.6   8.4
          150        2.1   0.1   8.8
          300        2.1   0.1   9
          300        1.7   0.1   9.2
          300        1.7   0.1   9.2
          300        1.7   0.1   9.1
          300        1.7   0.1   9
          300        1.7   0.1   9
          300        1.7   0.1   8.9
          300        1.7   0.1   8.9
          300        1.7   0.1   8.9
        Sample Initial nitrogen: Thickness=[150, 150, 300, 300, 300, 300, 300, 300, 300, 300, 300]; SWUnits=Volumetric; OCUnits=Total; PHUnits=Water
          SW=[81, 79.4999, 162, 162, 137.39999, 93, 96, 99, 102, 105, 108]
        CERESSoilTemperature
        Nutrient
          DirectedGraphInfo={Nodes=[{Name=Inert, OutlineColour=Black}, {Name=SurfaceResidue, OutlineColour=Black}, {Name=FOMLignin, OutlineColour=Black}, {Name=FOMCellulose, OutlineColour=Black}, {Name=FOMCarbohydrate, OutlineColour=Black}, {Name=Microbial, OutlineColour=Black}, {Name=Humic, OutlineColour=Black}, {Name=Urea, OutlineColour=Black}, {Name=NO3, OutlineColour=Black}, {Name=NH4, OutlineColour=Black}, {Name=Atmosphere, OutlineColour=White}], Arcs=[{SourceName=SurfaceResidue, DestinationName=Microbial}, {SourceName=SurfaceResidue, DestinationName=Humic}, {SourceName=FOMLignin, DestinationName=Microbial}, {SourceName=FOMLignin, DestinationName=Humic}, {SourceName=FOMCellulose, DestinationName=Microbial}, {SourceName=FOMCellulose, DestinationName=Humic}, {SourceName=FOMCarbohydrate, DestinationName=Microbial}, {SourceName=FOMCarbohydrate, DestinationName=Humic}, {SourceName=Microbial, DestinationName=Microbial}, {SourceName=Microbial, DestinationName=Humic}, {SourceName=Humic, DestinationName=Microbial}, {SourceName=Urea, DestinationName=NH4}, {SourceName=NO3, DestinationName=Atmosphere}, {SourceName=NH4, DestinationName=NO3}]}
      Fertiliser
      Sugarcane: crop_type=Sugarcane; tt_emerg_to_begcane_ub=2000; tt_begcane_to_flowering_ub=10000; tt_flowering_to_crop_end_ub=5000; n_uptake_option=1; NO3_diffn_const=2; n_supply_preference=active; kno3=0.05; knh4=0.05; total_n_uptake_max=0.6; ll_ub=1000; kl_ub=1; minsw=1e-05; latitude_ub=90; latitude_lb=-90; maxt_ub=55; mint_ub=40; mint_lb=-10; radn_ub=50; radn_lb=1; dlayer_ub=1000; dul_dep_ub=1000; sw_dep_ub=1000; NO3_ub=10000; NO3_min_ub=10000; NH4_ub=10000; NH4_min_ub=10000; eo_crop_factor=100; uptake_source=calc; rlv_init=[0.04, 0.02, 0.01, 0.005, 0, 0, 0]
        zero: maxt_lb, LAI, WaterDemand, no3ppm_min, nh4ppm_min, dlayer_lb, dul_dep_lb, sw_dep_lb, NO3_lb, NO3_min_lb, NH4_lb, NH4_min_lb
        plant={stage_names=[sowing, sprouting, emergence, begin_cane, flowering, end_crop], stage_code_list=[1, 2, 3, 4, 5, 6], rue=[0, 0, 1.8, 1.8, 1.8, 0], root_depth_rate=[0, 0, 10, 15, 15, 15], ratio_root_shoot=[0, 0, 0.2, 0.15, 0.1, 0], transp_eff_cf=[0.008, 0.008, 0.008, 0.008, 0.008, 0.008], n_fix_rate=[0, 0, 0, 0, 0, 0], extinction_coef=0.38, extinction_coef_dead=0.01, leaf_no_crit=99, tt_emerg_limit=800, days_germ_limit=40, swdf_pheno_limit=500, swdf_photo_limit=500, swdf_photo_rate=0, initial_root_depth=150, specific_root_length=18000, x_plant_rld=[0, 0.1], y_rel_root_rate=[1, 1], root_die_back_fr=0.17, initial_tpla=1000, sla_lfno=[6, 25], sla_max=[11500, 11500], sla_min=[9000, 8500], x_stem_wt=[0, 200], y_height=[0, 6000], svp_fract=0.75, eo_crop_factor_default=100, pesw_germ=0.05, fasw_emerg=[0, 0.7], rel_emerg_rate=[0.3, 1], leaf_no_at_emerg=1, shoot_lag=250, shoot_rate=0.8, x_node_no_app=[1, 20, 30, 40], y_node_app_rate=[80, 105, 125, 150], x_node_no_leaf=[1, 20, 30, 40], y_leaves_per_node=[1, 1, 1, 1], dm_root_init=0.2, dm_sstem_init=0.01, dm_leaf_init=0.2, dm_cabbage_init=0.143, dm_sucrose_init=0, leaf_cabbage_ratio=1.7, cabbage_sheath_fr=0.2, dm_root_sen_frac=0.002, dead_detach_frac=[0.1, 0.1, 0.05, 0.1, 0], sen_detach_frac=[1, 0.01, 0, 0.01, 0], leaf_no_correction=1.6, lai_sen_light=4.99, sen_light_slope=0.001, frost_temp=[-5, 0, 2], frost_fraction=[1, 0.1, 0], sen_rate_water=0.01, twilight=-6, x_stage_code=[1, 2, 3, 4, 5], y_n_conc_crit_leaf=[0.025, 0.025, 0.015, 0.015, 0.005], y_n_conc_min_leaf=[0.015, 0.015, 0.005, 0.005, 0.004], y_n_conc_crit_cane=[0.009, 0.009, 0.009, 0.006, 0.0035], y_n_conc_min_cane=[0.002, 0.002, 0.0005, 0.0005, 0.0005], y_n_conc_crit_cabbage=[0.019, 0.019, 0.006, 0.006, 0.001], y_n_conc_min_cabbage=[0.01, 0.01, 0.003, 0.003, 0.0008], n_conc_crit_root=0.01, n_conc_min_root=0.005, n_root_init_conc=0.01, n_sstem_init_conc=0.007, n_leaf_init_conc=0.03, n_cabbage_init_conc=0.02, n_root_sen_conc=0.005, n_leaf_sen_conc=0.004, n_cabbage_sen_conc=0.0008, x_ave_temp=[0, 5, 15, 35, 50], y_stress_photo=[0, 0, 1, 1, 0], x_ave_temp_stalk=[0, 50], y_stress_stalk=[1, 1], x_temp=[9, 32, 45], y_tt=[0, 23, 0], x_sw_demand_ratio=[0.1, 0.6], y_swdef_leaf=[0, 1], x_demand_ratio_stalk=[0.3, 1.5], y_swdef_stalk=[0, 1], x_sw_avail_ratio=[0, 0.16], y_swdef_pheno=[1, 1], x_sw_ratio=[0, 0.25], y_sw_fac_root=[0, 1], k_nfact_photo=1.5, k_nfact_expansion=1.25, k_nfact_stalk=1, k_nfact_pheno=100, oxdef_photo_rtfr=[0.5, 0.8], oxdef_photo=[1, 1], x_afps=[0.03, 0.05], y_afps_fac=[1, 1], cane_dmf_max=[0.11, 0.17, 0.23], cane_dmf_min=[0.09, 0.13, 0.2], cane_dmf_tt=[0, 500, 4500], cane_dmf_rate=0, stress_lodge=[0, 1], death_fr_lodge=[0.002, 0.001], lodge_redn_photo=0.92, lodge_redn_sucrose=0.77, lodge_redn_green_leaf=0.85}
        ratoon={stage_names=[sowing, sprouting, emergence, begin_cane, flowering, end_crop], stage_code_list=[1, 2, 3, 4, 5, 6], rue=[0, 0, 1.65, 1.65, 1.65, 0], root_depth_rate=[0, 0, 10, 15, 15, 15], ratio_root_shoot=[0, 0, 0.2, 0.15, 0.1, 0], transp_eff_cf=[0.008, 0.008, 0.008, 0.008, 0.008, 0.008], n_fix_rate=[0, 0, 0, 0, 0, 0], extinction_coef=0.38, extinction_coef_dead=0.01, leaf_no_crit=99, tt_emerg_limit=800, days_germ_limit=40, swdf_pheno_limit=500, swdf_photo_limit=500, swdf_photo_rate=0, initial_root_depth=150, specific_root_length=18000, x_plant_rld=[0, 0.1], y_rel_root_rate=[1, 1], root_die_back_fr=0.17, initial_tpla=1000, sla_lfno=[6, 25], sla_max=[11500, 11500], sla_min=[9000, 8500], x_stem_wt=[0, 200], y_height=[0, 6000], svp_fract=0.75, eo_crop_factor_default=100, pesw_germ=0.03, fasw_emerg=[0, 0.7], rel_emerg_rate=[0.3, 1], leaf_no_at_emerg=1, shoot_lag=100, shoot_rate=0.8, x_node_no_app=[1, 20, 30, 40], y_node_app_rate=[80, 105, 125, 150], x_node_no_leaf=[1, 20, 30, 40], y_leaves_per_node=[1, 1, 1, 1], dm_root_init=0.2, dm_sstem_init=0.01, dm_leaf_init=0.2, dm_cabbage_init=0.143, dm_sucrose_init=0, leaf_cabbage_ratio=1.7, cabbage_sheath_fr=0.2, dm_root_sen_frac=0.002, dead_detach_frac=[0.1, 0.1, 0.05, 0.1, 0], sen_detach_frac=[1, 0.01, 0, 0.01, 0], leaf_no_correction=1.6, lai_sen_light=4.99, sen_light_slope=0.001, frost_temp=[-5, 0, 2], frost_fraction=[1, 0.1, 0], sen_rate_water=0.01, twilight=-6, x_stage_code=[1, 2, 3, 4, 5], y_n_conc_crit_leaf=[0.025, 0.025, 0.015, 0.015, 0.005], y_n_conc_min_leaf=[0.015, 0.015, 0.005, 0.005, 0.004], y_n_conc_crit_cane=[0.009, 0.009, 0.009, 0.006, 0.0035], y_n_conc_min_cane=[0.002, 0.002, 0.0005, 0.0005, 0.0005], y_n_conc_crit_cabbage=[0.019, 0.019, 0.006, 0.006, 0.001], y_n_conc_min_cabbage=[0.01, 0.01, 0.003, 0.003, 0.0008], n_conc_crit_root=0.01, n_conc_min_root=0.005, n_root_init_conc=0.01, n_sstem_init_conc=0.007, n_leaf_init_conc=0.03, n_cabbage_init_conc=0.02, n_root_sen_conc=0.005, n_leaf_sen_conc=0.004, n_cabbage_sen_conc=0.0008, x_ave_temp=[0, 5, 15, 35, 50], y_stress_photo=[0, 0, 1, 1, 0], x_ave_temp_stalk=[0, 50], y_stress_stalk=[1, 1], x_temp=[9, 32, 45], y_tt=[0, 23, 0], x_sw_demand_ratio=[0.1, 0.6], y_swdef_leaf=[0, 1], x_demand_ratio_stalk=[0.3, 1.5], y_swdef_stalk=[0, 1], x_sw_avail_ratio=[0, 0.16], y_swdef_pheno=[1, 1], x_sw_ratio=[0, 0.25], y_sw_fac_root=[0, 1], k_nfact_photo=1.5, k_nfact_expansion=1.25, k_nfact_stalk=1, k_nfact_pheno=100, oxdef_photo_rtfr=[0.5, 0.8], oxdef_photo=[1, 1], x_afps=[0.03, 0.05], y_afps_fac=[1, 1], cane_dmf_max=[0.11, 0.17, 0.23], cane_dmf_min=[0.09, 0.13, 0.2], cane_dmf_tt=[0, 500, 4500], cane_dmf_rate=0, stress_lodge=[0, 1], death_fr_lodge=[0.002, 0.001], lodge_redn_photo=0.92, lodge_redn_sucrose=0.77, lodge_redn_green_leaf=0.85}
        cultivars:
          {cultivar_name=q117, leaf_size=[1500, 55000, 55000], leaf_size_no=[1, 14, 20], cane_fraction=0.7, sucrose_fraction_stalk=[1, 0.55], stress_factor_stalk=[0.2, 1], sucrose_delay=0, min_sstem_sucrose=800, min_sstem_sucrose_redn=10, tt_emerg_to_begcane=1900, tt_begcane_to_flowering=6000, tt_flowering_to_crop_end=2000, green_leaf_no=13, tillerf_leaf_size=[1, 1.5, 1.5, 1, 1], tillerf_leaf_size_no=[1, 6, 10, 12, 26]}
          {cultivar_name=q117_ratoon, leaf_size=[1500, 55000, 55000], leaf_size_no=[1, 14, 20], cane_fraction=0.7, sucrose_fraction_stalk=[1, 0.55], stress_factor_stalk=[0.2, 1], sucrose_delay=0, min_sstem_sucrose=800, min_sstem_sucrose_redn=10, tt_emerg_to_begcane=1900, tt_begcane_to_flowering=6000, tt_flowering_to_crop_end=2000, green_leaf_no=13, tillerf_leaf_size=[1.5, 1.5, 1.5, 1, 1], tillerf_leaf_size_no=[1, 4, 10, 12, 26]}
          {cultivar_name=q117_fum, leaf_size=[1500, 55000, 55000], leaf_size_no=[1, 14, 20], cane_fraction=0.7, sucrose_fraction_stalk=[1, 0.55], stress_factor_stalk=[0.2, 1], sucrose_delay=0, min_sstem_sucrose=800, min_sstem_sucrose_redn=10, tt_emerg_to_begcane=1900, tt_begcane_to_flowering=6000, tt_flowering_to_crop_end=2000, green_leaf_no=13, tillerf_leaf_size=[1.5, 3, 2.5, 1, 1], tillerf_leaf_size_no=[1, 4, 10, 12, 26]}
          {cultivar_name=q117_fum_ratoon, leaf_size=[1500, 55000, 55000], leaf_size_no=[1, 14, 20], cane_fraction=0.7, sucrose_fraction_stalk=[1, 0.55], stress_factor_stalk=[0.2, 1], sucrose_delay=0, min_sstem_sucrose=800, min_sstem_sucrose_redn=10, tt_emerg_to_begcane=1900, tt_begcane_to_flowering=6000, tt_flowering_to_crop_end=2000, green_leaf_no=13, tillerf_leaf_size=[2, 3, 2, 1, 1], tillerf_leaf_size_no=[1, 4, 10, 12, 26]}
          {cultivar_name=q96, leaf_size=[1500, 55000, 55000], leaf_size_no=[1, 14, 20], cane_fraction=0.7, sucrose_fraction_stalk=[1, 0.55], stress_factor_stalk=[0.2, 1], sucrose_delay=0, min_sstem_sucrose=900, min_sstem_sucrose_redn=10, tt_emerg_to_begcane=1900, tt_begcane_to_flowering=6000, tt_flowering_to_crop_end=2000, green_leaf_no=13, tillerf_leaf_size=[1, 1, 1.5, 1, 1], tillerf_leaf_size_no=[1, 4, 10, 16, 26]}
          {cultivar_name=q96_ratoon, leaf_size=[1500, 55000, 55000], leaf_size_no=[1, 14, 20], cane_fraction=0.7, sucrose_fraction_stalk=[1, 0.55], stress_factor_stalk=[0.2, 1], sucrose_delay=0, min_sstem_sucrose=900, min_sstem_sucrose_redn=10, tt_emerg_to_begcane=1900, tt_begcane_to_flowering=6000, tt_flowering_to_crop_end=2000, green_leaf_no=13, tillerf_leaf_size=[1.5, 1.5, 1.5, 1, 1], tillerf_leaf_size_no=[1, 4, 10, 16, 26]}
          {cultivar_name=q96_fum, leaf_size=[1500, 55000, 55000], leaf_size_no=[1, 14, 20], cane_fraction=0.7, sucrose_fraction_stalk=[1, 0.55], stress_factor_stalk=[0.2, 1], sucrose_delay=0, min_sstem_sucrose=900, min_sstem_sucrose_redn=10, tt_emerg_to_begcane=1900, tt_begcane_to_flowering=6000, tt_flowering_to_crop_end=2000, green_leaf_no=13, tillerf_leaf_size=[1, 1, 1.5, 1, 1], tillerf_leaf_size_no=[1, 4, 10, 16, 26]}
          {cultivar_name=q96_fum_ratoon, leaf_size=[1500, 55000, 55000], leaf_size_no=[1, 14, 20], cane_fraction=0.7, sucrose_fraction_stalk=[1, 0.55], stress_factor_stalk=[0.2, 1], sucrose_delay=0, min_sstem_sucrose=900, min_sstem_sucrose_redn=10, tt_emerg_to_begcane=1900, tt_begcane_to_flowering=6000, tt_flowering_to_crop_end=2000, green_leaf_no=13, tillerf_leaf_size=[1.5, 1.5, 1.5, 1, 1], tillerf_leaf_size_no=[1, 4, 10, 16, 26]}
          {cultivar_name=q138, leaf_size=[1500, 55000, 55000], leaf_size_no=[1, 14, 20], cane_fraction=0.7, sucrose_fraction_stalk=[1, 0.61], stress_factor_stalk=[0.2, 1], sucrose_delay=600, min_sstem_sucrose=1500, min_sstem_sucrose_redn=10, tt_emerg_to_begcane=1900, tt_begcane_to_flowering=6000, tt_flowering_to_crop_end=2000, green_leaf_no=13, tillerf_leaf_size=[1, 1, 1.5, 1, 1], tillerf_leaf_size_no=[1, 4, 10, 16, 26]}
          {cultivar_name=q138_ratoon, leaf_size=[1500, 55000, 55000], leaf_size_no=[1, 14, 20], cane_fraction=0.7, sucrose_fraction_stalk=[1, 0.61], stress_factor_stalk=[0.2, 1], sucrose_delay=0, min_sstem_sucrose=1500, min_sstem_sucrose_redn=10, tt_emerg_to_begcane=1900, tt_begcane_to_flowering=6000, tt_flowering_to_crop_end=2000, green_leaf_no=13, tillerf_leaf_size=[1.5, 1.5, 1.5, 1, 1], tillerf_leaf_size_no=[1, 4, 10, 16, 26]}
          {cultivar_name=q138_fum, leaf_size=[1500, 55000, 55000], leaf_size_no=[1, 14, 20], cane_fraction=0.7, sucrose_fraction_stalk=[1, 0.61], stress_factor_stalk=[0.2, 1], sucrose_delay=600, min_sstem_sucrose=1500, min_sstem_sucrose_redn=10, tt_emerg_to_begcane=1900, tt_begcane_to_flowering=6000, tt_flowering_to_crop_end=2000, green_leaf_no=13, tillerf_leaf_size=[1, 1, 1.5, 1, 1], tillerf_leaf_size_no=[1, 4, 10, 16, 26]}
          {cultivar_name=q138_fum_ratoon, leaf_size=[1500, 55000, 55000], leaf_size_no=[1, 14, 20], cane_fraction=0.7, sucrose_fraction_stalk=[1, 0.61], stress_factor_stalk=[0.2, 1], sucrose_delay=0, min_sstem_sucrose=1500, min_sstem_sucrose_redn=10, tt_emerg_to_begcane=1900, tt_begcane_to_flowering=6000, tt_flowering_to_crop_end=2000, green_leaf_no=13, tillerf_leaf_size=[1.5, 1.5, 1.5, 1, 1], tillerf_leaf_size_no=[1, 4, 10, 16, 26]}
          {cultivar_name=ts65-28, leaf_size=[1500, 55000, 55000], leaf_size_no=[1, 14, 20], cane_fraction=0.7, sucrose_fraction_stalk=[1, 0.55], stress_factor_stalk=[0.2, 1], sucrose_delay=0, min_sstem_sucrose=800, min_sstem_sucrose_redn=10, tt_emerg_to_begcane=1900, tt_begcane_to_flowering=6000, tt_flowering_to_crop_end=2000, green_leaf_no=13, tillerf_leaf_size=[1, 1, 1.5, 1, 1], tillerf_leaf_size_no=[1, 4, 10, 16, 26]}
          {cultivar_name=ts65-28_ratoon, leaf_size=[1500, 55000, 55000], leaf_size_no=[1, 14, 20], cane_fraction=0.7, sucrose_fraction_stalk=[1, 0.55], stress_factor_stalk=[0.2, 1], sucrose_delay=0, min_sstem_sucrose=800, min_sstem_sucrose_redn=10, tt_emerg_to_begcane=1900, tt_begcane_to_flowering=6000, tt_flowering_to_crop_end=2000, green_leaf_no=13, tillerf_leaf_size=[1.5, 1.5, 1.5, 1, 1], tillerf_leaf_size_no=[1, 4, 10, 16, 26]}
          {cultivar_name=ts65-28_fum, leaf_size=[1500, 55000, 55000], leaf_size_no=[1, 14, 20], cane_fraction=0.7, sucrose_fraction_stalk=[1, 0.55], stress_factor_stalk=[0.2, 1], sucrose_delay=0, min_sstem_sucrose=800, min_sstem_sucrose_redn=10, tt_emerg_to_begcane=1900, tt_begcane_to_flowering=6000, tt_flowering_to_crop_end=2000, green_leaf_no=13, tillerf_leaf_size=[1, 1, 1.5, 1, 1], tillerf_leaf_size_no=[1, 4, 10, 16, 26]}
          {cultivar_name=ts65-28_fum_ratoon, leaf_size=[1500, 55000, 55000], leaf_size_no=[1, 14, 20], cane_fraction=0.7, sucrose_fraction_stalk=[1, 0.55], stress_factor_stalk=[0.2, 1], sucrose_delay=0, min_sstem_sucrose=800, min_sstem_sucrose_redn=10, tt_emerg_to_begcane=1900, tt_begcane_to_flowering=6000, tt_flowering_to_crop_end=2000, green_leaf_no=13, tillerf_leaf_size=[1.5, 1.5, 1.5, 1, 1], tillerf_leaf_size_no=[1, 4, 10, 16, 26]}
          {cultivar_name=h73, leaf_size=[1500, 55000, 55000], leaf_size_no=[1, 14, 20], cane_fraction=0.7, sucrose_fraction_stalk=[1, 0.55], stress_factor_stalk=[0.2, 1], sucrose_delay=0, min_sstem_sucrose=800, min_sstem_sucrose_redn=10, tt_emerg_to_begcane=1900, tt_begcane_to_flowering=6000, tt_flowering_to_crop_end=2000, green_leaf_no=13, tillerf_leaf_size=[1, 1, 1.5, 1, 1], tillerf_leaf_size_no=[1, 4, 10, 16, 26]}
          {cultivar_name=h73_ratoon, leaf_size=[1500, 55000, 55000], leaf_size_no=[1, 14, 20], cane_fraction=0.7, sucrose_fraction_stalk=[1, 0.5], stress_factor_stalk=[0.2, 1], sucrose_delay=0, min_sstem_sucrose=800, min_sstem_sucrose_redn=10, tt_emerg_to_begcane=1900, tt_begcane_to_flowering=6000, tt_flowering_to_crop_end=2000, green_leaf_no=13, tillerf_leaf_size=[1.5, 1.5, 1.5, 1, 1], tillerf_leaf_size_no=[1, 4, 10, 16, 26]}
          {cultivar_name=q141, leaf_size=[1500, 55000, 55000], leaf_size_no=[1, 14, 20], cane_fraction=0.7, sucrose_fraction_stalk=[1, 0.64], stress_factor_stalk=[0.2, 1], sucrose_delay=0, min_sstem_sucrose=1200, min_sstem_sucrose_redn=10, tt_emerg_to_begcane=1900, tt_begcane_to_flowering=6000, tt_flowering_to_crop_end=2000, green_leaf_no=13, tillerf_leaf_size=[1, 1, 1.5, 1, 1], tillerf_leaf_size_no=[1, 4, 10, 16, 26]}
          {cultivar_name=q141_ratoon, leaf_size=[1500, 55000, 55000], leaf_size_no=[1, 14, 20], cane_fraction=0.7, sucrose_fraction_stalk=[1, 0.64], stress_factor_stalk=[0.2, 1], sucrose_delay=0, min_sstem_sucrose=1200, min_sstem_sucrose_redn=10, tt_emerg_to_begcane=1900, tt_begcane_to_flowering=6000, tt_flowering_to_crop_end=2000, green_leaf_no=13, tillerf_leaf_size=[1.5, 1.5, 1.5, 1, 1], tillerf_leaf_size_no=[1, 4, 10, 16, 26]}
          {cultivar_name=nco376, leaf_size=[3000, 7000, 12000, 28000, 28000], leaf_size_no=[1, 4, 6, 14, 20], cane_fraction=0.65, sucrose_fraction_stalk=[1, 0.55], stress_factor_stalk=[0.2, 1], sucrose_delay=0, min_sstem_sucrose=450, min_sstem_sucrose_redn=10, tt_emerg_to_begcane=1800, tt_begcane_to_flowering=6000, tt_flowering_to_crop_end=2000, green_leaf_no=10, tillerf_leaf_size=[1, 1, 1.5, 1, 1], tillerf_leaf_size_no=[1, 4, 10, 16, 26]}
          {cultivar_name=nco376_ratoon, leaf_size=[3000, 7000, 12000, 28000, 28000], leaf_size_no=[1, 4, 6, 14, 20], cane_fraction=0.65, sucrose_fraction_stalk=[1, 0.55], stress_factor_stalk=[0.2, 1], sucrose_delay=0, min_sstem_sucrose=450, min_sstem_sucrose_redn=10, tt_emerg_to_begcane=1800, tt_begcane_to_flowering=6000, tt_flowering_to_crop_end=2000, green_leaf_no=10, tillerf_leaf_size=[1.5, 1.5, 1.5, 1, 1], tillerf_leaf_size_no=[1, 4, 10, 16, 26]}
          {cultivar_name=n12, leaf_size=[3000, 7000, 12000, 30000, 30000], leaf_size_no=[1, 4, 6, 14, 20], cane_fraction=0.7, sucrose_fraction_stalk=[1, 0.55], stress_factor_stalk=[0.2, 1], sucrose_delay=0, min_sstem_sucrose=450, min_sstem_sucrose_redn=10, tt_emerg_to_begcane=1900, tt_begcane_to_flowering=6000, tt_flowering_to_crop_end=2000, green_leaf_no=13, tillerf_leaf_size=[1, 1, 1.5, 1, 1], tillerf_leaf_size_no=[1, 4, 10, 16, 26]}
          {cultivar_name=n12_ratoon, leaf_size=[3000, 7000, 12000, 30000, 30000], leaf_size_no=[1, 4, 6, 14, 20], cane_fraction=0.7, sucrose_fraction_stalk=[1, 0.55], stress_factor_stalk=[0.2, 1], sucrose_delay=0, min_sstem_sucrose=450, min_sstem_sucrose_redn=10, tt_emerg_to_begcane=1900, tt_begcane_to_flowering=6000, tt_flowering_to_crop_end=2000, green_leaf_no=13, tillerf_leaf_size=[1.5, 1.5, 1.5, 1, 1], tillerf_leaf_size_no=[1, 4, 10, 16, 26]}
          {cultivar_name=n14, leaf_size=[3000, 8000, 13000, 45000, 45000], leaf_size_no=[1, 4, 6, 14, 20], cane_fraction=0.7, sucrose_fraction_stalk=[1, 0.55], stress_factor_stalk=[0.2, 1], sucrose_delay=0, min_sstem_sucrose=450, min_sstem_sucrose_redn=10, tt_emerg_to_begcane=1900, tt_begcane_to_flowering=6000, tt_flowering_to_crop_end=2000, green_leaf_no=13, tillerf_leaf_size=[1, 1.5, 1.5, 1, 1], tillerf_leaf_size_no=[1, 4, 10, 16, 26]}
          {cultivar_name=n14_ratoon, leaf_size=[3000, 8000, 13000, 45000, 45000], leaf_size_no=[1, 4, 6, 14, 20], cane_fraction=0.7, sucrose_fraction_stalk=[1, 0.55], stress_factor_stalk=[0.2, 1], sucrose_delay=0, min_sstem_sucrose=450, min_sstem_sucrose_redn=10, tt_emerg_to_begcane=1900, tt_begcane_to_flowering=6000, tt_flowering_to_crop_end=2000, green_leaf_no=13, tillerf_leaf_size=[1.5, 1.5, 1.5, 1, 1], tillerf_leaf_size_no=[1, 4, 10, 16, 26]}
          {cultivar_name=CP51, leaf_size=[3000, 7000, 15000, 35000, 35000], leaf_size_no=[1, 4, 7, 15, 20], cane_fraction=0.7, sucrose_fraction_stalk=[1, 0.55], stress_factor_stalk=[0.2, 1], sucrose_delay=0, min_sstem_sucrose=450, min_sstem_sucrose_redn=10, tt_emerg_to_begcane=1350, tt_begcane_to_flowering=6000, tt_flowering_to_crop_end=2000, green_leaf_no=13, tillerf_leaf_size=[1, 1, 1, 1, 1], tillerf_leaf_size_no=[1, 4, 10, 16, 26]}
          {cultivar_name=CP51_ratoon, leaf_size=[3000, 7000, 15000, 35000, 35000], leaf_size_no=[1, 4, 7, 15, 20], cane_fraction=0.7, sucrose_fraction_stalk=[1, 0.55], stress_factor_stalk=[0.2, 1], sucrose_delay=0, min_sstem_sucrose=450, min_sstem_sucrose_redn=10, tt_emerg_to_begcane=1350, tt_begcane_to_flowering=6000, tt_flowering_to_crop_end=2000, green_leaf_no=13, tillerf_leaf_size=[1.5, 1.5, 1, 1, 1], tillerf_leaf_size_no=[1, 4, 10, 16, 26]}
          {cultivar_name=R570, leaf_size=[3000, 7000, 10000, 45000, 60000, 60000], leaf_size_no=[1, 4, 6, 10, 14, 20], cane_fraction=0.68, sucrose_fraction_stalk=[1, 0.58], stress_factor_stalk=[0.2, 1], sucrose_delay=0, min_sstem_sucrose=693, min_sstem_sucrose_redn=10, tt_emerg_to_begcane=1500, tt_begcane_to_flowering=6000, tt_flowering_to_crop_end=2000, green_leaf_no=13, tillerf_leaf_size=[6, 1], tillerf_leaf_size_no=[1, 12]}
          {cultivar_name=R570_ratoon, leaf_size=[3000, 7000, 10000, 45000, 60000, 60000], leaf_size_no=[1, 4, 6, 10, 14, 20], cane_fraction=0.68, sucrose_fraction_stalk=[1, 0.58], stress_factor_stalk=[0.2, 1], sucrose_delay=0, min_sstem_sucrose=693, min_sstem_sucrose_redn=10, tt_emerg_to_begcane=1500, tt_begcane_to_flowering=6000, tt_flowering_to_crop_end=2000, green_leaf_no=13, tillerf_leaf_size=[10, 1], tillerf_leaf_size_no=[1, 12]}
          {cultivar_name=M1356, leaf_size=[3000, 7000, 10000, 25000, 40000, 40000], leaf_size_no=[1, 4, 6, 10, 14, 20], cane_fraction=0.78, sucrose_fraction_stalk=[1, 0.57], stress_factor_stalk=[0.2, 1], sucrose_delay=0, min_sstem_sucrose=521, min_sstem_sucrose_redn=10, tt_emerg_to_begcane=1200, tt_begcane_to_flowering=6000, tt_flowering_to_crop_end=2000, green_leaf_no=13, tillerf_leaf_size=[6, 1], tillerf_leaf_size_no=[1, 12]}
          {cultivar_name=M1356_ratoon, leaf_size=[3000, 7000, 10000, 25000, 40000, 40000], leaf_size_no=[1, 4, 6, 10, 14, 20], cane_fraction=0.78, sucrose_fraction_stalk=[1, 0.57], stress_factor_stalk=[0.2, 1], sucrose_delay=0, min_sstem_sucrose=521, min_sstem_sucrose_redn=10, tt_emerg_to_begcane=1200, tt_begcane_to_flowering=6000, tt_flowering_to_crop_end=2000, green_leaf_no=13, tillerf_leaf_size=[10, 1], tillerf_leaf_size_no=[1, 12]}
          {cultivar_name=M55560, leaf_size=[3000, 7000, 10000, 35000, 50000, 50000], leaf_size_no=[1, 4, 6, 10, 14, 20], cane_fraction=0.7, sucrose_fraction_stalk=[1, 0.62], stress_factor_stalk=[0.2, 1], sucrose_delay=0, min_sstem_sucrose=775, min_sstem_sucrose_redn=10, tt_emerg_to_begcane=1300, tt_begcane_to_flowering=6000, tt_flowering_to_crop_end=2000, green_leaf_no=13, tillerf_leaf_size=[6, 1], tillerf_leaf_size_no=[1, 12]}
          {cultivar_name=M55560_ratoon, leaf_size=[3000, 7000, 10000, 35000, 50000, 50000], leaf_size_no=[1, 4, 6, 10, 14, 20], cane_fraction=0.7, sucrose_fraction_stalk=[1, 0.62], stress_factor_stalk=[0.2, 1], sucrose_delay=0, min_sstem_sucrose=775, min_sstem_sucrose_redn=10, tt_emerg_to_begcane=1300, tt_begcane_to_flowering=6000, tt_flowering_to_crop_end=2000, green_leaf_no=13, tillerf_leaf_size=[10, 1], tillerf_leaf_size_no=[1, 12]}
          {cultivar_name=q124, leaf_size=[1500, 55000, 55000], leaf_size_no=[1, 14, 20], cane_fraction=0.7, sucrose_fraction_stalk=[1, 0.55], stress_factor_stalk=[0.2, 1], sucrose_delay=0, min_sstem_sucrose=800, min_sstem_sucrose_redn=10, tt_emerg_to_begcane=1900, tt_begcane_to_flowering=6000, tt_flowering_to_crop_end=2000, green_leaf_no=13, tillerf_leaf_size=[1, 1, 1.5, 1, 1], tillerf_leaf_size_no=[1, 4, 10, 16, 26]}
          {cultivar_name=q124_ratoon, leaf_size=[1500, 55000, 55000], leaf_size_no=[1, 14, 20], cane_fraction=0.7, sucrose_fraction_stalk=[1, 0.55], stress_factor_stalk=[0.2, 1], sucrose_delay=0, min_sstem_sucrose=800, min_sstem_sucrose_redn=10, tt_emerg_to_begcane=1900, tt_begcane_to_flowering=6000, tt_flowering_to_crop_end=2000, green_leaf_no=13, tillerf_leaf_size=[1.5, 1.5, 1.5, 1, 1], tillerf_leaf_size_no=[1, 4, 10, 16, 26]}
      Folder Manager folder
        Manager SUGAR management
          planting_day = 1-apr
          plantlen = 450
          plant_stalks = 10
          variety = q117
          sowing_depth = 150
          NoRatoons = 4
          ratoonlen = 390
          ratoon_stalks = 10
```csharp
using System;
using Models.Core;
using Models.PMF;
using Models.PMF;
using APSIM.Shared.Utilities;

namespace Models
{
    [Serializable]
    [System.Xml.Serialization.XmlInclude(typeof(Model))]
    public class Script : Model
    {
        [Link] Clock Clock;
        [Link] Sugarcane Sugarcane;
        
        [Description("Enter planting date (dd-mmm)")]
        public string planting_day { get; set; }
        [Description("Duration of a plant crop (days) (30days/mth x 15mths)")]
        public int    plantlen { get; set; }
        [Description("Stalk density of plant crop (/m2)")]
        public double plant_stalks { get; set; }
        [Description("Planting variety")]
        [Display(Type=DisplayType.CultivarName, PlantName = "Sugarcane")]
        public string variety { get; set; }
        [Description("Planting depth (mm)")]
        public double sowing_depth { get; set; }
        [Description("Number of ratoons before EndCrop")]  
        public int    NoRatoons { get; set; }
        [Description("Duration of a ratoon crop (days) (30days/mth x 13mths)")]
        public int    ratoonlen { get; set; }
        [Description("Stalk density of ratoon crop (/m2)")]
        public double ratoon_stalks { get; set; }
        

        private int dah;
        //Remove this later, I don't think they use it. Days After Harvest.
        
        //two below are used for rotations. Remove this. I don't think ApsimX does rotations like this.
        private int nextcrop;
        private int fallowin;

        
        [EventSubscribe("StartOfSimulation")]
        private void OnStartOfSimulation(object sender, EventArgs e)
        {
            //Rotation variables. Not sure if these are still needed in ApsimX rotations
            nextcrop = 0;
            fallowin = 0;
        }


        [EventSubscribe("StartOfDay")]
        private void OnStartOfDay(object sender, EventArgs e)
        {

            //! Initialise and set a time counter for entire run
            dah = 0;


            if (Sugarcane.crop_status == "alive")
            {
                dah = 0;

                //! Set harvest dates for each crop phase
                if (((Sugarcane.DaysAfterSowing == plantlen) && (Sugarcane.ratoon_no == 0))
                    || ((Sugarcane.DaysAfterSowing == ratoonlen) && (Sugarcane.ratoon_no > 0)))
                {
                    
                    Sugarcane.HarvestCrop();
                    if (Sugarcane.ratoon_no == NoRatoons + 1)
                    {
                        //! plough the crop out
                        Sugarcane.KillCrop();
                        Sugarcane.EndCrop();
                    }
                    else
                    {
                        //! Set stalk density
                        Sugarcane.plants = ratoon_stalks;
                    }
                }
                else
                {
                    //! We have not reached the harvest date for this ratoon.
                }
            }
            else if (Sugarcane.crop_status == "dead")
            {
                Sugarcane.HarvestCrop();
                Sugarcane.EndCrop();
            }
            else if ((Sugarcane.crop_status == "out") && (DateUtilities.DatesEqual(planting_day, Clock.Today)))
            {
                Sugarcane.SowNewPlant(PlantingDensity: 10, Depth: sowing_depth, CultivarName: variety);
                Sugarcane.plants = plant_stalks;
                dah = 0;
            }
            else
            {
                dah = dah + 1;
            }
     
        }
    }
}
```
        Manager Fertilise on fixed date
          fert_date = 1-Sep
          fert_criteria = 1000
          fert_amount = 200
          fert_type = hard coded
```csharp
using Models.Interfaces;
using APSIM.Shared.Utilities;
using Models.Soils;
using Models.Soils.Nutrients;
using Models.PMF;
using Models.PMF;
using Models.Core;
using System;

namespace Models
{
    [Serializable]
    [System.Xml.Serialization.XmlInclude(typeof(Model))]
    public class Script : Model
    {
        [Link] private Clock Clock;
        [Link] private Soil Soil;
        [Link] private Fertiliser Fertiliser;
        [Link] private Summary Summary;
        private double N_topsoil;
        [Link(ByName = true)]
        private ISolute NO3;
        [Link(ByName = true)]
        private ISolute NH4;

        
        [Description("Fertilise on this date (dd-mmm)")]
        public string fert_date { get; set; }
        
        [Description("Don't add fertiliser if N in top 2 layers exceeds (kg/ha)")]
        public double fert_criteria { get; set; }
        
        [Description("Amount to apply (kg/ha)")]
        public double fert_amount { get; set; }
        
        [Description("Type of fertilser to apply")]
        public string fert_type { get; set; }
    


        /*
         if (today = date('[fert_date]') then
            N_topsoil = no3(1) + nh4(1) + no3(2) + nh4(2)
            if (N_topsoil < [fert_criteria]) then
               [fertmodule] apply amount = [fert_amount] (kg/ha), depth = 50 (mm), type = [fert_type] ()
            endif
         endif 
        */
        
        
        [EventSubscribe("StartOfDay")]
        private void OnStartOfDay(object sender, EventArgs e)
        {

            if (DateUtilities.DatesEqual(fert_date, Clock.Today))
            {
                N_topsoil = NO3.kgha[1] + NH4.kgha[1] + NO3.kgha[2] + NH4.kgha[2];                    
                if (N_topsoil < fert_criteria)
                {
                    Fertiliser.Apply(Amount: fert_amount, Depth: 50, Type: Fertiliser.Types.UreaN);
                }
            }

        }
      
    }
}
```
      Report: EventNames=[Clock].DoReport
        VariableNames:
          [Clock].Today
          [Sugarcane].crop_status as crop_status
          [Sugarcane].biomass as biomass
          [Sugarcane].cane_wt as cane_wt
          [Sugarcane].sucrose_wt as sucrose_wt
          [Sugarcane].height as height
          [Sugarcane].root_depth as root_depth
          [Sugarcane].node_no_detached as node_no_detached
          [Sugarcane].leaves as leaves
          [Sugarcane].green_leaves as green_leaves
          [Sugarcane].dead_leaves as dead_leaves
          [Sugarcane].lai as lai
          [Sugarcane].tla  as tla
          [Sugarcane].plant_n_tot as plant_n_tot
          [Sugarcane].swdef_photo as swdef_photo
          [Sugarcane].swdef_pheno  as swdef_pheno
          [Sugarcane].swdef_expan  as swdef_expan
          [Sugarcane].swdef_stalk  as swdef_stalk
          [Sugarcane].nfact_photo as nfact_photo
          [Sugarcane].nfact_expan  as nfact_expan
          [Sugarcane].oxdef_photo  as oxdef_photo
          [Sugarcane].ep  as ep
  DataStore
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