Simulations: Version=206
  Memo Introduction
    # Introduction

    Suitable for both new users as well as those already familiar with APSIM, we will take you through how to setup and run a crop model.

    		The new interface will be mostly familiar to existing APSIM users, but there are significant changes to learn about, particularly in outputting and managing your results.

    		Learn how to manage and analyse key events in the crop growth cycle.
    		You will also be introduced to the process of ongoing improvement to APSIM Next Generation, and how you will be able to contribute
  DataStore
  Experiment
    Factors
      Factor Site
        CompositeFactor ForestHill
          Specifications:
            [Weather]
            [Soil]
          Weather: FileName=ForestHill.met
          Soil: ASCOrder=Vertosol; ASCSubOrder=Black; SoilType=Clay; Site=Lawes; NearestTown=Lawes, Q 4343; Region=Southeast Coast; State=Queensland; Country=Australia; NaturalVegetation=Blue Gum, Moreton Bay Ash, Tea Tree; ApsoilNumber=37; Latitude=-27.537; Longitude=152.336; LocationAccuracy=+/- 20m; YearOfSampling=0; DataSource=CSIRO Sustainable Ecosystems, Toowoomba; Comments=Clay - OC and ph estimated
            Physical
              Thickness  BD    AirDry  LL15  DUL   SAT
              150        1.32  0.13    0.26  0.41  0.47
              150        1.3   0.208   0.26  0.43  0.48
              300        1.23  0.26    0.26  0.46  0.51
              300        1.27  0.26    0.26  0.44  0.49
              300        1.37  0.25    0.25  0.4   0.45
              300        1.35  0.26    0.26  0.41  0.46
              300        1.35  0.26    0.26  0.38  0.46
              BD, DUL source: Field measured and checked for sensibility
              AirDry, LL15 source: Estimated based on local knowledge
              SAT source: Calculated from measured, estimated or calculated BD
              SoilCrop wheatSoil: LL=[0.26, 0.26, 0.26, 0.26, 0.25, 0.29, 0.36]; KL=[0.06, 0.06, 0.06, 0.04, 0.04, 0.02, 0.02]; XF=[1, 1, 1, 1, 1, 1, 1]
                LL source: Field measured and checked for sensibility
              SoilCrop canolaSoil: LL=[0.26, 0.26, 0.39, 0.36, 0.31, 0.28, 0.32]; KL=[0.06, 0.06, 0.06, 0.04, 0.04, 0.02, 0.01]; XF=[1, 1, 1, 1, 1, 1, 1]
                LL source: Field measured and checked for sensibility
              SoilCrop chickpeaSoil: LL=[0.26, 0.26, 0.26, 0.29, 0.32, 0.31, 0.37]; KL=[0.06, 0.06, 0.06, 0.06, 0.06, 0.06, 0.06]; XF=[1, 1, 1, 1, 1, 1, 1]
                LL source: Field measured and checked for sensibility
              SoilCrop sorghumSoil: LL=[0.26, 0.26, 0.35, 0.32, 0.29, 0.31, 0.31]; KL=[0.07, 0.07, 0.07, 0.05, 0.05, 0.04, 0.03]; XF=[1, 1, 1, 1, 1, 1, 1]
                LL source: Field measured and checked for sensibility
              SoilCrop fababeanSoil: LL=[0.26, 0.3, 0.42, 0.4, 0.35, 0.35, 0.38]; KL=[0.08, 0.08, 0.08, 0.08, 0.06, 0.04, 0.03]; XF=[1, 1, 1, 1, 1, 1, 1]
                LL source: Field measured and checked for sensibility
              SoilCrop SCRUMSoil: same as Experiment.Factors.Site.ForestHill.Soil.Physical.wheatSoil
            WaterBalance SoilWater: SummerDate=1-Nov; SummerU=6; SummerCona=3.5; WinterDate=1-Apr; WinterU=4; WinterCona=2.5; DiffusConst=40; DiffusSlope=16; Salb=0.12; CN2Bare=73; CNRed=20; CNCov=0.8; DischargeWidth=0; CatchmentArea=0; PSIDul=-100; Thickness=[150, 150, 300, 300, 300, 300, 300]; SWCON=[0.3, 0.3, 0.3, 0.3, 0.3, 0.3, 0.3]
            Organic: FOMCNRatio=40; CarbonUnits=WalkleyBlack
              Thickness  Carbon    SoilCNRatio  FBiom  FInert  FOM
              150        0.953846  12           0.04   0.4     347.129
              150        0.953846  12           0.02   0.6     270.344
              300        0.961538  12           0.02   0.8     163.972
              300        0.846154  12           0.02   1       99.4541
              300        0.546154  12           0.01   1       60.322
              300        0.261538  12           0.01   1       36.5871
              300        0.2       12           0.01   1       22.1912
            Chemical: Thickness=[150, 150, 300, 300, 300, 300, 300]; PH=[8, 8, 8, 8, 8, 8, 8]; PHUnits=Water
              PH source: Estimated based on local knowledge
            Nutrient
            Solute NO3: InitialValuesUnits=ppm; WaterTableConcentration=0; D0=0; DepthConstant=0; MaxDepthSoluteAccessible=0; RunoffEffectivenessAtMovingSolute=0; MaxEffectiveRunoff=0
            Solute NH4: InitialValuesUnits=ppm; WaterTableConcentration=0; D0=0; DepthConstant=0; MaxDepthSoluteAccessible=0; RunoffEffectivenessAtMovingSolute=0; MaxEffectiveRunoff=0
            Solute Urea: Thickness=[150, 150, 300, 300, 300, 300, 300]; InitialValues=[0, 0, 0, 0, 0, 0, 0]; InitialValuesUnits=kg/ha; WaterTableConcentration=0; D0=0; DepthConstant=0; MaxDepthSoluteAccessible=0; RunoffEffectivenessAtMovingSolute=0; MaxEffectiveRunoff=0
            Water: Thickness=[150, 150, 300, 300, 300, 300, 300]; InitialValues=[0.41, 0.43, 0.46, 0.44, 0.4, 0.41, 0.38]; FilledFromTop=false
            SoilTemperature Temperature
        CompositeFactor Nuriootpa
          Weather: FileName=Nuriootpa.met
    Simulation Base
      Clock: Start=1990-01-01; End=2000-12-31
      Summary
      Weather: FileName=%root%/Examples/WeatherFiles/AU_Dalby.met
      SoilArbitrator
      MicroClimate: a_interception=0; b_interception=1; c_interception=0; d_interception=0; SoilHeatFluxFraction=0.4; MinimumHeightDiffForNewLayer=0; NightInterceptionFraction=0.5; ReferenceHeight=2
      Zone Field: Area=1; Slope=0; AspectAngle=0; Altitude=50
        Report DailyReport: EventNames=[Clock].EndOfDay
          VariableNames:
            [Clock].Today
            // --- Plant Organ Variables ---
            [Wheat].LAI
            [Wheat].Phenology.Zadok.Stage
            [Wheat].Phenology.CurrentStageName
            [Wheat].AboveGround.Wt
            [Wheat].AboveGround.N
            [Wheat].Grain.Total.Wt*10 as Yield
            [Wheat].Grain.Protein
            [Wheat].Grain.Size
            [Wheat].Grain.Number
            [Wheat].Grain.Total.Wt
            [Wheat].Grain.Total.N
            [Wheat].Total.Wt
            // --- Soil Water Depths ---
            [Soil].Water.Volumetric[0mm:900mm] as VolumeOfWaterInTopHalf
            [Soil].Water.Volumetric[900mm:1800mm] as VolumeOfWaterInBottomHalf
            sum([Soil].Water.Volumetric) as TotalWaterVolume
            // --- Graph label variables ---
            [EventOutputs].Script.CropEventName
          Memo How to interpret report variables
            # How to Interpret Report variables

            Here is an example of a common plant report variable:

            ```
            [Wheat].Phenology.Zadok.Stage
            ```

            Each time you see a '.' you have travelled one level deeper into the model structure.
            So what you are asking for is:

            ```
            [Wheat]
              |
              |
              |--[Phenology]
                     |
                     |
                     |--[Zadok]
                           |
                           |
                           |-- Stage
            ```
        Fertiliser
        Soil: ASCOrder=Vertosol; ASCSubOrder=Black; SoilType=Clay; Site=Norwin; NearestTown=Norwin; Region=Darling Downs and Granite Belt; State=Queensland; Country=Australia; NaturalVegetation=Qld. Bluegrass, possible Qld. Blue gum; ApsoilNumber=900; Latitude=-27.581836; Longitude=151.320206; LocationAccuracy=+/- 20m; YearOfSampling=0
          DataSource=CSIRO Sustainable Ecosystems, Toowoomba; Characteriesd as part of the GRDC funded project"Doing it better, doing it smarter, managing soil water in Australian agriculture' 2011
          Comments=Clay - OC, CLL for all crops estimated-based on Bongeen Mywybilla Soil No1
          Physical
            Thickness  ParticleSizeSand  ParticleSizeSilt  ParticleSizeClay  Rocks  BD       AirDry    LL15      DUL       SAT       KS
            150        5                 65                30                0      1.01056  0.13025   0.2605    0.521     0.588655  20
            150        5                 65                30                0      1.07146  0.198689  0.248362  0.496723  0.565677  20
            300        5                 65                30                0      1.09394  0.28      0.28      0.488438  0.557193  20
            300        5                 65                30                0      1.15861  0.28      0.28      0.480297  0.532787  20
            300        5                 65                30                0      1.17301  0.28      0.28      0.471584  0.527354  20
            300        5                 65                30                0      1.16287  0.28      0.28      0.457071  0.53118   20
            300        5                 65                30                0      1.1875   0.28      0.28      0.452332  0.521888  20
            Rocks, ParticleSizeSand, ParticleSizeSilt, ParticleSizeClay source: Calculated
            SoilCrop WheatSoil: LL=[0.261, 0.248, 0.28, 0.306, 0.36, 0.392, 0.446]; KL=[0.06, 0.06, 0.06, 0.04, 0.04, 0.02, 0.01]; XF=[1, 1, 1, 1, 1, 1, 1]
          WaterBalance SoilWater: SummerDate=1-Nov; SummerU=5; SummerCona=5; WinterDate=1-Apr; WinterU=5; WinterCona=5; DiffusConst=40; DiffusSlope=16; Salb=0.12; CN2Bare=73; CNRed=20; CNCov=0.8; PSIDul=-100; Thickness=[150, 150, 300, 300, 300, 300, 300]; SWCON=[0.3, 0.3, 0.3, 0.3, 0.3, 0.3, 0.3]
          Organic: FOMCNRatio=40; CarbonUnits=Total
            Thickness  Carbon  SoilCNRatio  FBiom  FInert  FOM
            150        1.2     12           0.04   0.4     347.129
            150        0.96    12           0.02   0.6     270.344
            300        0.6     12           0.02   0.8     163.972
            300        0.3     12           0.02   1       99.4541
            300        0.18    12           0.01   1       60.322
            300        0.12    12           0.01   1       36.5871
            300        0.12    12           0.01   1       22.1912
          Chemical: PHUnits=Water
            Thickness  PH  CEC
            150        8   11.045
            150        8   10.505
            300        8   9.695
            300        8   9.02
            300        8   8.75
            300        8   8.615
            300        8   8.615
            CEC source: Calculated
          Water: Thickness=[150, 150, 300, 300, 300, 300, 300]; FilledFromTop=false
            InitialValues=[0.521, 0.496723, 0.488438, 0.480297, 0.471584, 0.457071, 0.452332]
          Nutrient
          Solute NO3: Thickness=[150, 150, 300, 300, 300, 300, 300]; InitialValues=[1, 1, 1, 1, 1, 1, 1]; InitialValuesUnits=ppm; WaterTableConcentration=0; D0=0; DepthConstant=0; MaxDepthSoluteAccessible=0; RunoffEffectivenessAtMovingSolute=0; MaxEffectiveRunoff=0
          Solute NH4: Thickness=[150, 150, 300, 300, 300, 300, 300]; InitialValues=[0.1, 0.1, 0.1, 0.1, 0.1, 0.1, 0.1]; InitialValuesUnits=ppm; WaterTableConcentration=0; D0=0; DepthConstant=0; MaxDepthSoluteAccessible=0; RunoffEffectivenessAtMovingSolute=0; MaxEffectiveRunoff=0
          Solute Urea: same as Experiment.Factors.Site.ForestHill.Soil.Urea
          SoilTemperature Temperature
        SurfaceOrganicMatter: InitialResidueName=wheat_stubble; InitialResidueType=wheat; InitialResidueMass=500; InitialStandingFraction=0; InitialCPR=0; InitialCNR=100
        Plant Wheat
        Manager Sow using a variable rule
          Crop = [Wheat]
          StartDate = 1-may
          EndDate = 10-jul
          MinESW = 100
          MinRain = 25
          RainDays = 7
          CultivarName = Hartog
          SowingDepth = 30
          RowSpacing = 250
          Population = 120
```csharp
using APSIM.Numerics;
using Models.Climate;
using System.Linq;
using System;
using Models.Core;
using Models.PMF;
using Models.Soils;
using Models.Utilities;
using APSIM.Shared.Utilities;
using Models.Interfaces;

namespace Models
{
    [Serializable]
    public class Script : Model
    {
        [Link] private Clock Clock;
        [Link] private Fertiliser Fertiliser;
        [Link] private Summary Summary;
        [Link] private Soil Soil;
        private Accumulator accumulatedRain;
        [Link]
        private ISoilWater waterBalance;
        
        [Description("Crop")]
        public IPlant Crop { get; set; }

        [Description("Start of sowing window (d-mmm)")]
        public string StartDate { get; set; }

        [Description("End of sowing window (d-mmm)")]
        public string EndDate { get; set; }

        [Description("Minimum extractable soil water for sowing (mm)")]
        public double MinESW { get; set; }

        [Description("Accumulated rainfall required for sowing (mm)")]
        public double MinRain { get; set; }

        [Description("Duration of rainfall accumulation (d)")]
        public int RainDays { get; set; }

        [Display(Type = DisplayType.CultivarName)]
        [Description("Cultivar to be sown")]
        public string CultivarName { get; set; }

        [Description("Sowing depth (mm)")]
        public double SowingDepth { get; set; }

        [Description("Row spacing (mm)")]
        public double RowSpacing { get; set; }

        [Description("Plant population (/m2)")]
        public double Population { get; set; }
        
        
        [EventSubscribe("StartOfSimulation")]
        private void OnSimulationCommencing(object sender, EventArgs e)
        {
            accumulatedRain = new Accumulator(this, "[Weather].Rain", RainDays);
        }

        [EventSubscribe("DoManagement")]
        private void OnDoManagement(object sender, EventArgs e)
        {
            accumulatedRain.Update();
            
            if (DateUtilities.WithinDates(StartDate, Clock.Today, EndDate) &&
                !Crop.IsAlive &&
                MathUtilities.Sum(waterBalance.ESW) > MinESW &&
                accumulatedRain.Sum > MinRain)
            {
                Crop.Sow(population: Population, cultivar: CultivarName, depth: SowingDepth, rowSpacing: RowSpacing);    
            }
        }
    }
}
```
        Manager Fertilise at sowing
          Crop = [Wheat]
          FertiliserType = NO3N
          Amount = 160
```csharp
using Models.Soils;
using System;
using System.Linq;
using Models.Core;
using Models.PMF;
namespace Models
{
    [Serializable]
    public class Script : Model
    {
        [Link] Clock Clock;
        [Link] Fertiliser Fertiliser;
        
        [Description("Crop to be fertilised")]
        public IPlant Crop { get; set; }

        [Description("Type of fertiliser to apply? ")] 
        [Display(Type = DisplayType.FertiliserType)]public string FertiliserType { get; set; }
    
        [Description("Amount of fertiliser to be applied (kg/ha)")]
        public double Amount { get; set; }
        
        [EventSubscribe("Sowing")]
        private void OnSowing(object sender, EventArgs e)
        {
            Model crop = sender as Model;
            if (Crop != null && crop.Name.ToLower() == (Crop as IModel).Name.ToLower())
                Fertiliser.Apply(amount: Amount, type: FertiliserType);
        }
    }
}
```
        Manager Harvest
          Crop = [Wheat]
```csharp
using APSIM.Shared.Utilities;
using Models.Utilities;
using Models.Soils;
using Models.PMF;
using Models.Core;
using System;
using System.Linq;

namespace Models
{
    [Serializable] 
    public class Script : Model
    {
        [Description("Crop")]
        public IPlant Crop { get; set; }
        
        [EventSubscribe("DoManagement")]
        private void OnDoManagement(object sender, EventArgs e)
        {
            if (Crop.IsReadyForHarvesting)
            {
                Crop.Harvest();
                Crop.EndCrop();
            }
        }
    }
}
```
        Manager EventOutputs
```csharp
using System;
using Models.Core;
using Models.Interfaces;
using Models.PMF;
using APSIM.Shared.Utilities;
using Models.Soils;

namespace Models
{
    [Serializable]
    public class Script : Model
    {

        public string CropEventName { get; set;}            


        [EventSubscribe("StartOfDay")]
        private void OnStartOfDay(object sender, EventArgs e)
        {
            CropEventName = "";
        }
    

        [EventSubscribe("Sowing")]
        private void OnSowing(object sender, EventArgs e)
        {
            CropEventName = ((IPlant) sender).Name + " Sowing";
        }
        
        [EventSubscribe("PlantEnding")]
        private void OnEnding(object sender, EventArgs e)
        {
            CropEventName = ((IPlant) sender).Name + " Ending";
        }
        
    }
}
```
        Report HarvestReport: EventNames=[Clock].DoReport
          VariableNames:
            [Clock].Today
            // Rainfall variables
            sum of [Weather].Rain from [Wheat].Sowing to [Wheat].Harvesting as WheatInCropRain
            [Wheat].LAI
            [Wheat].Grain.Total.Wt*10 as Yield
            [Wheat].Grain.Protein
            [Wheat].Grain.Size
            [Wheat].Grain.Number
            [Wheat].Grain.Total.Wt
            [Wheat].Grain.Total.N
            [Wheat].Total.Wt
          Memo How to interpret report variables: same as Experiment.Base.Field.DailyReport.How to interpret report variables
  Memo How to visualise water at various depths
    # How to Visualise Water at various depths

    There are various ways to visual the soil water at various depths.

    Traditionallly, the soil layers were split into discrete sections that would be referenced by an index.

    Now, there is another way to accomplish this by specifying your layers using depths in millimeters.

    If we look at the water variables in the DailyReport model, you can see several examples of this.

    You can see the graphed results in the various graphs here.
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