Simulations: Version=206
  DataStore
  Memo Introduction
    # Introduction

    Suitable for both new users as well as those already familiar with APSIM, we will take you through how to setup and run a crop model.
    The new interface will be mostly familiar to existing APSIM users, but there are significant changes to learn about, particularly in outputting and managing your results.
    Learn how to manage and analyse key events in the crop growth cycle.
    You will also be introduced to the process of ongoing improvement to APSIM Next Generation, and how you will be able to contribute

    ## Scenario and Objective

    We are going to set up a fictional wheat crop experiment at two different locations in Australia.

    A prebuilt simulation will have one site preconfigured; this will be called ForestHill located in South East Queensland.
    Next, we will build another, this time for a site called Freeling located in South Australia.

    In setting up the Freeling site we will gain experience building a crop trial in an Experiment configuration.

    Once this is setup and run, we will examine the outputs. This will then give us the opportunity to change the configuration to investigate how differing
    treatments affect the experiments.
  Memo Step 1 Second Site Experiment Setup Notes
    # 1 Setup a Freeling Experiment Site Factor

    ## 1.1 Objective

    The objective here is to gain experience setting up a realistic experiment where you are trying to model disparate locations
    model them without having to duplicate entire simulations and models.

    ## 1.2 Steps

    1) Right-click [Site], click 'add model' find and select [CompositeFactor].
    2) Rename the new [CompositeFactor] model 'Millicent'.
    3) Right-click [Millicent], click 'add model', find and select [Weather].
    4) A weather file has been provided. All we have to do is select [Weather], click 'Browse' and locate the weather file in the same directory as this simulation ( Examples/Tutorials/CropProductionAndDevelopment)
    5) At the bottom of the Explorer view (left sidebar), locate the [AdditionalModels] folder. In the 'Soils/Millicent' folder copy the soil model to the Freeling model. You can also drag and drop the model if you prefer.
  Memo Step 2 Data Analysis
    # 2 Analyse the Data

    In this step will take our data and analyse the outputs graphically.

    ## 2.1 Objectives

    ## 2.2 Steps
  Memo Step 3 Treatment Setups
    # 2 Modify Experiments

    In this step will modify our experiments to see how that impacts our results.

    ## 2.1 Objectives

    The main objective is to gain experience with the various models, but particularly [Experiment] and [Factor] models, and the models we include
    as children to these. By changing and observing the results we will gain understanding in how the combination of these changes our outcomes.

    ## 2.2 Steps
  Memo Step 4 Reanalyse Results
    # 4 Reanalyse results

    ## 4.1 Objective

    The objective with this step is to understand what model parameter to change to achieve a desired result.
    This step further helps familiarise us as to where to go to view results and how to manipulate graphs to view output data in various ways.

    ## 4.2 Steps

    ## 4.3 Recap

    Through building, analysing, modifying, and finally reanalysing the results we have:
    - gained experience using APSIM to change models and parameters to manipulate the results of our simulation.
    - gained understanding as to which parameters to change to achieve a desired result.
    -
  Experiment
    Factors
      Permutation
        Factor Site
          CompositeFactor ForestHill
            Specifications:
              [Weather]
              [Soil]
              [Operations]
            Weather: FileName=ForestHill.met
            Soil: ASCOrder=Vertosol; ASCSubOrder=Black; SoilType=Clay; Site=Lawes; NearestTown=Lawes, Q 4343; Region=Southeast Coast; State=Queensland; Country=Australia; NaturalVegetation=Blue Gum, Moreton Bay Ash, Tea Tree; ApsoilNumber=37; Latitude=-27.537; Longitude=152.336; LocationAccuracy=+/- 20m; YearOfSampling=0; DataSource=CSIRO Sustainable Ecosystems, Toowoomba; Comments=Clay - OC and ph estimated
              Physical
                Thickness  BD    AirDry  LL15  DUL   SAT
                150        1.32  0.13    0.26  0.41  0.47
                150        1.3   0.208   0.26  0.43  0.48
                300        1.23  0.26    0.26  0.46  0.51
                300        1.27  0.26    0.26  0.44  0.49
                300        1.37  0.25    0.25  0.4   0.45
                300        1.35  0.26    0.26  0.41  0.46
                300        1.35  0.26    0.26  0.38  0.46
                BD, DUL source: Field measured and checked for sensibility
                AirDry, LL15 source: Estimated based on local knowledge
                SAT source: Calculated from measured, estimated or calculated BD
                SoilCrop wheatSoil: LL=[0.26, 0.26, 0.26, 0.26, 0.25, 0.29, 0.36]; KL=[0.06, 0.06, 0.06, 0.04, 0.04, 0.02, 0.02]; XF=[1, 1, 1, 1, 1, 1, 1]
                  LL source: Field measured and checked for sensibility
                SoilCrop canolaSoil: LL=[0.26, 0.26, 0.39, 0.36, 0.31, 0.28, 0.32]; KL=[0.06, 0.06, 0.06, 0.04, 0.04, 0.02, 0.01]; XF=[1, 1, 1, 1, 1, 1, 1]
                  LL source: Field measured and checked for sensibility
                SoilCrop chickpeaSoil: LL=[0.26, 0.26, 0.26, 0.29, 0.32, 0.31, 0.37]; KL=[0.06, 0.06, 0.06, 0.06, 0.06, 0.06, 0.06]; XF=[1, 1, 1, 1, 1, 1, 1]
                  LL source: Field measured and checked for sensibility
                SoilCrop sorghumSoil: LL=[0.26, 0.26, 0.35, 0.32, 0.29, 0.31, 0.31]; KL=[0.07, 0.07, 0.07, 0.05, 0.05, 0.04, 0.03]; XF=[1, 1, 1, 1, 1, 1, 1]
                  LL source: Field measured and checked for sensibility
                SoilCrop fababeanSoil: LL=[0.26, 0.3, 0.42, 0.4, 0.35, 0.35, 0.38]; KL=[0.08, 0.08, 0.08, 0.08, 0.06, 0.04, 0.03]; XF=[1, 1, 1, 1, 1, 1, 1]
                  LL source: Field measured and checked for sensibility
                SoilCrop SCRUMSoil: same as Experiment.Factors.Permutation.Site.ForestHill.Soil.Physical.wheatSoil
              WaterBalance SoilWater: SummerDate=1-Nov; SummerU=6; SummerCona=3.5; WinterDate=1-Apr; WinterU=4; WinterCona=2.5; DiffusConst=40; DiffusSlope=16; Salb=0.12; CN2Bare=73; CNRed=20; CNCov=0.8; DischargeWidth=0; CatchmentArea=0; PSIDul=-100; Thickness=[150, 150, 300, 300, 300, 300, 300]; SWCON=[0.3, 0.3, 0.3, 0.3, 0.3, 0.3, 0.3]
              Organic: FOMCNRatio=40; CarbonUnits=WalkleyBlack
                Thickness  Carbon    SoilCNRatio  FBiom  FInert  FOM
                150        0.953846  12           0.04   0.4     347.129
                150        0.953846  12           0.02   0.6     270.344
                300        0.961538  12           0.02   0.8     163.972
                300        0.846154  12           0.02   1       99.4541
                300        0.546154  12           0.01   1       60.322
                300        0.261538  12           0.01   1       36.5871
                300        0.2       12           0.01   1       22.1912
              Chemical: Thickness=[150, 150, 300, 300, 300, 300, 300]; PH=[8, 8, 8, 8, 8, 8, 8]; PHUnits=Water
                PH source: Estimated based on local knowledge
              Nutrient
              Solute NO3: InitialValuesUnits=ppm; WaterTableConcentration=0; D0=0; DepthConstant=0; MaxDepthSoluteAccessible=0; RunoffEffectivenessAtMovingSolute=0; MaxEffectiveRunoff=0
              Solute NH4: InitialValuesUnits=ppm; WaterTableConcentration=0; D0=0; DepthConstant=0; MaxDepthSoluteAccessible=0; RunoffEffectivenessAtMovingSolute=0; MaxEffectiveRunoff=0
              Solute Urea: Thickness=[150, 150, 300, 300, 300, 300, 300]; InitialValues=[0, 0, 0, 0, 0, 0, 0]; InitialValuesUnits=kg/ha; WaterTableConcentration=0; D0=0; DepthConstant=0; MaxDepthSoluteAccessible=0; RunoffEffectivenessAtMovingSolute=0; MaxEffectiveRunoff=0
              Water: Thickness=[150, 150, 300, 300, 300, 300, 300]; InitialValues=[0.41, 0.43, 0.46, 0.44, 0.4, 0.41, 0.38]; FilledFromTop=false
              SoilTemperature Temperature
            Operations
              1999-05-22  [Base]..Sow(population: 120, cultivar: Hartog, sowingDepth:30, rowSpacing: 250);
              1999-05-22  Plant.Sow(population: 120, cultivar: Hartog, sowingDepth:30, rowSpacing: 250);
          CompositeFactor Millicent
            Specifications:
              [Weather]
              [Soil]
              [Operations]
            Weather: FileName=Millicent.met
            Operations
              1999-04-18  [Wheat].Sow(population: 180, cultivar: Hartog, sowingDepth: 30, rowSpacing: 225);
              2000-04-18  [Wheat].Sow(population: 180, cultivar: Hartog, sowingDepth: 30, rowSpacing: 225);
            Soil: ASCOrder=Dermosol; ASCSubOrder=Black; SoilType=Clay; Site=Hatherleigh; NearestTown=Millicent; Region=Lower Southeast; State=South Australia; Country=Australia; ApsoilNumber=1254; Latitude=-37.494324; Longitude=140.243266; LocationAccuracy=+/- 5m; YearOfSampling=2015; Comments=Dark gradational clay loam - Soil is located in a plain
              DataSource=CSIRO in collaboration with GRDC Project 'Measuring and managing soil water in Australian agriculture'
              Physical
                Thickness  ParticleSizeSand  ParticleSizeSilt  ParticleSizeClay  BD        AirDry     LL15      DUL       SAT
                100        29.85             59.92             10.23             0.70503   0.0785558  0.157112  0.51072   0.683951
                100        48.93             25.59             25.48             0.667796  0.179154   0.223942  0.455786  0.698002
                200        67.83             29                3.17              0.860878  0.335572   0.335572  0.480216  0.625141
                200        60.79             20.61             18.6              0.807646  0.37053    0.37053   0.488992  0.645228
                200        62.26             20.35             17.39             0.756526  0.37053    0.37053   0.510704  0.664518
                200        48.5              23.87             27.64             0.777567  0.37053    0.37053   0.463121  0.656579
                BD, DUL source: Field measured and checked for sensibility
                AirDry, LL15 source: Estimated based on local knowledge
                SAT source: Calculated from measured, estimated or calculated BD
                SoilCrop wheatSoil: LL=[0.157112, 0.223942, 0.335572, 0.37053, 0.442266, 0.442266]; KL=[0.06, 0.06, 0.06, 0.06, 0.04, 0.04]; XF=[1, 1, 1, 1, 1, 1]
                  LL source: Field measured and checked for sensibility
                SoilCrop SCRUMSoil: same as Experiment.Factors.Permutation.Site.Millicent.Soil.Physical.wheatSoil
              WaterBalance SoilWater: SummerDate=1-nov; SummerU=6; SummerCona=3.5; WinterDate=1-apr; WinterU=2; WinterCona=2; DiffusConst=88; DiffusSlope=35; Salb=0.14; CN2Bare=73; CNRed=20; CNCov=0.8; DischargeWidth=0; CatchmentArea=0; PSIDul=-100; Thickness=[100, 100, 200, 200, 200, 200]; SWCON=[0.5, 0.5, 0.5, 0.5, 0.5, 0.5]
              Organic: FOMCNRatio=40; CarbonUnits=WalkleyBlack
                Thickness  Carbon  SoilCNRatio  FBiom  FInert  FOM
                100        5       12           0.035  0.4     390.598
                100        4.8     12           0.02   0.5     289.362
                200        2.89    12           0.015  0.7     158.805
                200        1.3     12           0.015  0.95    87.1541
                200        0.69    12           0.01   0.95    47.8312
                200        0.42    12           0.01   0.95    26.2503
              Chemical: PHUnits=Water
                Thickness  PH   EC     ESP       CEC
                100        8.4  0.139  0.76779   53.4
                100        8.4  0.184  0.857788  44.3
                200        8.6  0.171  1.95122   32.8
                200        8.8  0.169  3.45622   21.7
                200        9    0.12   4.9505    20.2
                200        8.8  0.191  3.69792   19.2
                EC, CL, CEC, PH source: Measured
                ESP source: C
              Nutrient
              Solute NO3: InitialValuesUnits=ppm; WaterTableConcentration=0; D0=0; DepthConstant=0; MaxDepthSoluteAccessible=0; RunoffEffectivenessAtMovingSolute=0; MaxEffectiveRunoff=0
              Solute NH4: InitialValuesUnits=ppm; WaterTableConcentration=0; D0=0; DepthConstant=0; MaxDepthSoluteAccessible=0; RunoffEffectivenessAtMovingSolute=0; MaxEffectiveRunoff=0
              Solute Urea: Thickness=[100, 100, 200, 200, 200, 200]; InitialValues=[0, 0, 0, 0, 0, 0]; InitialValuesUnits=kg/ha; WaterTableConcentration=0; D0=0; DepthConstant=0; MaxDepthSoluteAccessible=0; RunoffEffectivenessAtMovingSolute=0; MaxEffectiveRunoff=0
              Water: Thickness=[100, 100, 200, 200, 200, 200]; InitialValues=[0.51072, 0.455786, 0.480216, 0.488992, 0.510704, 0.463121]; FilledFromTop=false
              SoilTemperature Temperature
        Factor Year: Specification=[Clock]
          Clock 1999: Start=1999-03-01; End=2000-02-28
          Clock 2000: Start=2000-03-01; End=2001-02-28
        Factor Tillage: Specification=[Tillage on a fixed date].Script.Fraction = 0 to 1 step 1
    Simulation Base
      Clock: Start=1990-01-01; End=2000-12-31
      Summary
      Weather: FileName=%root%/Examples/WeatherFiles/AU_Dalby.met
      SoilArbitrator
      MicroClimate: a_interception=0; b_interception=1; c_interception=0; d_interception=0; SoilHeatFluxFraction=0.4; MinimumHeightDiffForNewLayer=0; NightInterceptionFraction=0.5; ReferenceHeight=2
      Zone Field: Area=1; Slope=0; AspectAngle=0; Altitude=50
        Report DailyReport: EventNames=[Clock].EndOfDay
          VariableNames:
            // --- Time variables ---
            [Clock].Today
            // --- Plant Organ Variables ---
            [Wheat].LAI
            [Wheat].Phenology.Zadok.Stage
            [Wheat].Phenology.CurrentStageName
            [Wheat].AboveGround.Wt
            [Wheat].AboveGround.N
            [Wheat].Grain.Total.Wt*10 as Yield
            [Wheat].Grain.Protein
            [Wheat].Grain.Size
            [Wheat].Grain.Number
            [Wheat].Grain.Total.Wt
            [Wheat].Grain.Total.N
            [Wheat].Total.Wt
            // --- Water usage ---
            [Root].WaterUptakeByZone
            // --- Soil
            [Soil].Water.Volumetric[0mm:900mm]
            [Soil].Water.Volumetric[900mm:1800mm]
            sum([Soil].Water.Volumetric)
            sum([Nutrient].Organic.C) as OrganicC
            // --- Rainfall ---
            sum of [Weather].Rain from [Wheat].Sowing to [Wheat].Harvesting as WheatInCropRain
            // Nitrogen
            sum([NO3].kgha)
            // --- Graph label variables ---
            [EventOutputs].Script.CropEventName
          Memo How to interpret report variables
            # How to Interpret Report variables

            Here is an example of a common plant report variable:

            ```
            [Wheat].Phenology.Zadok.Stage
            ```

            Each time you see a '.' you have travelled one level deeper into the model structure.
            So what you are asking for is:

            ```
            [Wheat]
              |
              |
              |--[Phenology]
                     |
                     |
                     |--[Zadok]
                           |
                           |
                           |-- Stage
            ```
        Report HarvestReport: EventNames=[Wheat].Harvesting
          VariableNames:
            [Clock].Today
            // Rainfall variables
            sum of [Weather].Rain from [Wheat].Sowing to [Wheat].Harvesting as WheatInCropRain
            [Wheat].LAI
            [Wheat].Grain.Total.Wt*10 as Yield
            [Wheat].Grain.Protein
            [Wheat].Grain.Size
            [Wheat].Grain.Number
            [Wheat].Grain.Total.Wt
            [Wheat].Grain.Total.N
            [Wheat].Total.Wt
          Memo How to interpret report variables: same as Experiment.Base.Field.DailyReport.How to interpret report variables
        Fertiliser
        Soil: ASCOrder=Vertosol; ASCSubOrder=Black; SoilType=Clay; Site=Norwin; NearestTown=Norwin; Region=Darling Downs and Granite Belt; State=Queensland; Country=Australia; NaturalVegetation=Qld. Bluegrass, possible Qld. Blue gum; ApsoilNumber=900; Latitude=-27.581836; Longitude=151.320206; LocationAccuracy=+/- 20m; YearOfSampling=0
          DataSource=CSIRO Sustainable Ecosystems, Toowoomba; Characteriesd as part of the GRDC funded project"Doing it better, doing it smarter, managing soil water in Australian agriculture' 2011
          Comments=Clay - OC, CLL for all crops estimated-based on Bongeen Mywybilla Soil No1
          Physical
            Thickness  ParticleSizeSand  ParticleSizeSilt  ParticleSizeClay  Rocks  BD       AirDry    LL15      DUL       SAT       KS
            150        5                 65                30                0      1.01056  0.13025   0.2605    0.521     0.588655  20
            150        5                 65                30                0      1.07146  0.198689  0.248362  0.496723  0.565677  20
            300        5                 65                30                0      1.09394  0.28      0.28      0.488438  0.557193  20
            300        5                 65                30                0      1.15861  0.28      0.28      0.480297  0.532787  20
            300        5                 65                30                0      1.17301  0.28      0.28      0.471584  0.527354  20
            300        5                 65                30                0      1.16287  0.28      0.28      0.457071  0.53118   20
            300        5                 65                30                0      1.1875   0.28      0.28      0.452332  0.521888  20
            Rocks, ParticleSizeSand, ParticleSizeSilt, ParticleSizeClay source: Calculated
            SoilCrop WheatSoil: LL=[0.261, 0.248, 0.28, 0.306, 0.36, 0.392, 0.446]; KL=[0.06, 0.06, 0.06, 0.04, 0.04, 0.02, 0.01]; XF=[1, 1, 1, 1, 1, 1, 1]
          WaterBalance SoilWater: SummerDate=1-Nov; SummerU=5; SummerCona=5; WinterDate=1-Apr; WinterU=5; WinterCona=5; DiffusConst=40; DiffusSlope=16; Salb=0.12; CN2Bare=73; CNRed=20; CNCov=0.8; PSIDul=-100; Thickness=[150, 150, 300, 300, 300, 300, 300]; SWCON=[0.3, 0.3, 0.3, 0.3, 0.3, 0.3, 0.3]
          Organic: FOMCNRatio=40; CarbonUnits=Total
            Thickness  Carbon  SoilCNRatio  FBiom  FInert  FOM
            150        1.2     12           0.04   0.4     347.129
            150        0.96    12           0.02   0.6     270.344
            300        0.6     12           0.02   0.8     163.972
            300        0.3     12           0.02   1       99.4541
            300        0.18    12           0.01   1       60.322
            300        0.12    12           0.01   1       36.5871
            300        0.12    12           0.01   1       22.1912
          Chemical: PHUnits=Water
            Thickness  PH  CEC
            150        8   11.045
            150        8   10.505
            300        8   9.695
            300        8   9.02
            300        8   8.75
            300        8   8.615
            300        8   8.615
            CEC source: Calculated
          Water: Thickness=[150, 150, 300, 300, 300, 300, 300]; FilledFromTop=false
            InitialValues=[0.521, 0.496723, 0.488438, 0.480297, 0.471584, 0.457071, 0.452332]
          Nutrient
          Solute NO3: Thickness=[150, 150, 300, 300, 300, 300, 300]; InitialValues=[1, 1, 1, 1, 1, 1, 1]; InitialValuesUnits=ppm; WaterTableConcentration=0; D0=0; DepthConstant=0; MaxDepthSoluteAccessible=0; RunoffEffectivenessAtMovingSolute=0; MaxEffectiveRunoff=0
          Solute NH4: Thickness=[150, 150, 300, 300, 300, 300, 300]; InitialValues=[0.1, 0.1, 0.1, 0.1, 0.1, 0.1, 0.1]; InitialValuesUnits=ppm; WaterTableConcentration=0; D0=0; DepthConstant=0; MaxDepthSoluteAccessible=0; RunoffEffectivenessAtMovingSolute=0; MaxEffectiveRunoff=0
          Solute Urea: same as Experiment.Factors.Permutation.Site.ForestHill.Soil.Urea
          SoilTemperature Temperature
        SurfaceOrganicMatter: InitialResidueName=wheat_stubble; InitialResidueType=wheat; InitialResidueMass=500; InitialStandingFraction=0; InitialCPR=0; InitialCNR=100
        Plant Wheat
        Manager Fertilise at sowing
          Crop = [Wheat]
          FertiliserType = NO3N
          Amount = 160
```csharp
using Models.Soils;
using System;
using System.Linq;
using Models.Core;
using Models.PMF;
namespace Models
{
    [Serializable]
    public class Script : Model
    {
        [Link] Clock Clock;
        [Link] Fertiliser Fertiliser;
        
        [Description("Crop to be fertilised")]
        public IPlant Crop { get; set; }

        [Description("Type of fertiliser to apply? ")] 
        [Display(Type = DisplayType.FertiliserType)]public string FertiliserType { get; set; }
    
        [Description("Amount of fertiliser to be applied (kg/ha)")]
        public double Amount { get; set; }
        
        [EventSubscribe("Sowing")]
        private void OnSowing(object sender, EventArgs e)
        {
            Model crop = sender as Model;
            if (Crop != null && crop.Name.ToLower() == (Crop as IModel).Name.ToLower())
                Fertiliser.Apply(amount: Amount, type: FertiliserType);
        }
    }
}
```
        Manager Harvest
          Crop = [Wheat]
```csharp
using APSIM.Shared.Utilities;
using Models.Utilities;
using Models.Soils;
using Models.PMF;
using Models.Core;
using System;
using System.Linq;

namespace Models
{
    [Serializable] 
    public class Script : Model
    {
        [Description("Crop")]
        public IPlant Crop { get; set; }
        
        [EventSubscribe("DoManagement")]
        private void OnDoManagement(object sender, EventArgs e)
        {
            if (Crop.IsReadyForHarvesting)
            {
                Crop.Harvest();
                Crop.EndCrop();
            }
        }
    }
}
```
        Manager EventOutputs
```csharp
using System;
using Models.Core;
using Models.Interfaces;
using Models.PMF;
using APSIM.Shared.Utilities;
using Models.Soils;

namespace Models
{
    [Serializable]
    public class Script : Model
    {

        public string CropEventName { get; set;}            


        [EventSubscribe("StartOfDay")]
        private void OnStartOfDay(object sender, EventArgs e)
        {
            CropEventName = "";
        }
    

        [EventSubscribe("Sowing")]
        private void OnSowing(object sender, EventArgs e)
        {
            CropEventName = ((IPlant) sender).Name + " Sowing";
        }
        
        [EventSubscribe("PlantEnding")]
        private void OnEnding(object sender, EventArgs e)
        {
            CropEventName = ((IPlant) sender).Name + " Ending";
        }
        
    }
}
```
        Manager Tillage on a fixed date
          TillageDate = 1-mar
          Fraction = 0.5
          Depth = 300
```csharp
using Models.Soils;
using System;
using System.Linq;
using Models.Core;
using Models.PMF;
using APSIM.Shared.Utilities;
using Models.Surface;

namespace Models
{
    [Serializable]
    public class Script : Model
    {
        [Link] Clock Clock;
        [Link] SurfaceOrganicMatter SOM;
        
        [Description("Tillage Date")]
        public string TillageDate { get; set; }
        
        [Description("Fraction of Residues To Incorporate (0-1)")]
        public double Fraction { get; set; }

        [Description("Depth of Tillage (mm)")]
        public double Depth { get; set; }

        [EventSubscribe("DoManagement")]
        private void OnDoManagement(object sender, EventArgs e)
        {
            if (DateUtilities.WithinDates(TillageDate, Clock.Today, TillageDate))
                SOM.Incorporate(Fraction, Depth);
        }
    }
}
```
        Operations
      Manager Sow on a fixed date
        Crop =
        SowDate = 24-Jul
        CultivarName = Amethyst
        SowingDepth = 50
        RowSpacing = 750
        Population = 6
```csharp
using APSIM.Shared.Utilities;
using Models.Utilities;
using Models.Soils;
using Models.PMF;
using Models.Core;
using System;
using System.Linq;

namespace Models
{
    [Serializable]
    public class Script : Model
    {
        [Link] Clock Clock;
        [Link] Fertiliser Fertiliser;
        [Link] Summary Summary;
        [Link] Soil Soil;
        
        [Description("Crop")]
        public IPlant Crop { get; set; }

        [Description("Sowing date (d-mmm)")]
        public string SowDate { get; set; }

        [Display(Type = DisplayType.CultivarName)]
        [Description("Cultivar to be sown")]
        public string CultivarName { get; set; }

        [Description("Sowing depth (mm)")]
        public double SowingDepth { get; set; }

        [Description("Row spacing (mm)")]
        public double RowSpacing { get; set; }

        [Description("Plant population (/m2)")]
        public double Population { get; set; }

        [EventSubscribe("DoManagement")]
        private void OnDoManagement(object sender, EventArgs e)
        {
            if (DateUtilities.WithinDates(SowDate, Clock.Today, SowDate))
            {
                Crop.Sow(population: Population, cultivar: CultivarName, depth: SowingDepth, rowSpacing: RowSpacing);    
            }
        }
    }
}
```
  Memo How to visualise water at various depths
    # How to Visualise Water at various depths

    There are various ways to visual the soil water at various depths.

    Traditionallly, the soil layers were split into discrete sections that would be referenced by an index.

    Now, there is another way to accomplish this by specifying your layers using depths in millimeters.

    If we look at the water variables in the DailyReport model, you can see several examples of this.

    You can see the graphed results in the various graphs here.
  Folder AdditionalModels
    Folder Soils
      Folder Millicent
        Soil: same as Experiment.Factors.Permutation.Site.Millicent.Soil
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