Simulations: Version=175
  Memo
    This simulation file contains an experiment with 3 different mechanisms for calculating atmospheric potential evaporation (Eo). Each method is represented
    as a factor.

    1. The first factor is called 'Released'. It represents the default Eo calculation done by MicroClimate.
    2. The second factor is called 'Calculated'. It shows how Eo can be calculated by a manager script.
    3. The third factor is called 'Input'. It shows how Eo can be input from a .csv file that has 2 columns (date and Eo)

    The 'SoilWater top layer' graph shows the impact on soil water for the three mechanisms.
  DataStore
  Experiment Eo
    Factors
      Factor Type: Specification=[AtmosphericPotentialEvaporation]
        AtmosphericPotentialEvaporation Released
        Manager Calculated
```csharp
using System;
using Models;
using Models.Core;
using Models.Interfaces;
using Models.PMF;
using APSIM.Shared.Utilities;

namespace Models
{
    [Serializable]
    public class Script : Model, ICalculateEo
    {
        /// <summary>Calculate the atmospheric potential evaporation rate for a zone.</summary>
    	/// <param name="zone">The microclimate zone to calculate eo for.</param>
   		public double Calculate(MicroClimateZone zone)
   		{
   		   return 6.0;
   		}
    }
}
```
        Manager Input
          FileName = eo.csv
```csharp
using System;
using System.Collections.Generic;
using System.Linq;
using System.Globalization;
using Models;
using Models.Core;
using Models.Interfaces;
using Models.PMF;
using APSIM.Shared.Utilities;
using System.Data;

namespace Models
{
    [Serializable]
    public class Script : Model, ICalculateEo
    {
        [Link] Simulation simulation;
    	[Link] Clock clock;
    	
    	private List<DateTime> dates = new List<DateTime>();
    	private List<double> eo = new List<double>();
    	
        [Description("Name of file containing Eo data")]
		public string FileName { get; set; }
    	
		[EventSubscribe("StartOfSimulation")]
        private void OnStartOfSimulation(object sender, EventArgs e)
        {
			// Ensure filename is relative to the directory where the .apsimx file is located.
            string fullFileName = PathUtilities.GetAbsolutePath(FileName, simulation.FileName);
        
            // Read in data.
            var data = ApsimTextFile.ToTable(fullFileName);
            foreach (DataRow row in data.Rows)
            {
			    dates.Add((DateTime) row["date"]);
				eo.Add(Convert.ToDouble(row["Eo"]));
			}
        }
            	
        /// <summary>Calculate the atmospheric potential evaporation rate for a zone.</summary>
    	/// <param name="zone">The microclimate zone to calculate eo for.</param>
   		public double Calculate(MicroClimateZone zone)
   		{
			for (int i = 0; i< dates.Count; i++)
			{
			    if (dates[i].DayOfYear == clock.Today.DayOfYear && dates[i].Year == clock.Today.Year)
			    	return eo[i];
	    	}
			throw new Exception($"Cannot find an eo value for date {clock.Today.Date}");
   		}
    }
}
```
    Simulation Base
      Clock: Start=1900-01-01; End=1900-06-30
      Summary
      Weather: FileName=%root%/Examples/WeatherFiles/AU_Dalby.met
      SoilArbitrator
      MicroClimate: a_interception=0; b_interception=1; c_interception=0; d_interception=0; SoilHeatFluxFraction=0.4; MinimumHeightDiffForNewLayer=0; NightInterceptionFraction=0.5; ReferenceHeight=2
      Zone Field: Area=1; Slope=0; AspectAngle=0; Altitude=50
        Report: EventNames=[Clock].EndOfDay
          VariableNames:
            [Clock].Today
            [SoilWater].Eo
            [Water].MM
        Soil: ASCOrder=Vertosol; ASCSubOrder=Black; SoilType=Clay; Site=Norwin; NearestTown=Norwin; Region=Darling Downs and Granite Belt; State=Queensland; Country=Australia; NaturalVegetation=Qld. Bluegrass, possible Qld. Blue gum; ApsoilNumber=900; Latitude=-27.581836; Longitude=151.320206; LocationAccuracy=+/- 20m; YearOfSampling=0
          DataSource=CSIRO Sustainable Ecosystems, Toowoomba; Characteriesd as part of the GRDC funded project"Doing it better, doing it smarter, managing soil water in Australian agriculture' 2011
          Comments=Clay - OC, CLL for all crops estimated-based on Bongeen Mywybilla Soil No1
          Physical
            Thickness  BD       AirDry    LL15      DUL       SAT       KS
            150        1.01056  0.13025   0.2605    0.521     0.588655  20
            150        1.07146  0.198689  0.248362  0.496723  0.565677  20
            300        1.09394  0.28      0.28      0.488438  0.557193  20
            300        1.15861  0.28      0.28      0.480297  0.532787  20
            300        1.17301  0.28      0.28      0.471584  0.527354  20
            300        1.16287  0.28      0.28      0.457071  0.53118   20
            300        1.1875   0.28      0.28      0.452332  0.521888  20
            SoilCrop WheatSoil: LL=[0.261, 0.248, 0.28, 0.306, 0.36, 0.392, 0.446]; KL=[0.06, 0.06, 0.06, 0.04, 0.04, 0.02, 0.01]; XF=[1, 1, 1, 1, 1, 1, 1]
          WaterBalance SoilWater: SummerDate=1-Nov; SummerU=5; SummerCona=5; WinterDate=1-Apr; WinterU=5; WinterCona=5; DiffusConst=40; DiffusSlope=16; Salb=0.12; CN2Bare=73; CNRed=20; CNCov=0.8; PSIDul=-100; Thickness=[150, 150, 300, 300, 300, 300, 300]; SWCON=[0.3, 0.3, 0.3, 0.3, 0.3, 0.3, 0.3]
          Organic: FOMCNRatio=40; CarbonUnits=Total
            Thickness  Carbon  SoilCNRatio  FBiom  FInert  FOM
            150        1.2     12           0.04   0.4     347.129
            150        0.96    12           0.02   0.6     270.344
            300        0.6     12           0.02   0.8     163.972
            300        0.3     12           0.02   1       99.4541
            300        0.18    12           0.01   1       60.322
            300        0.12    12           0.01   1       36.5871
            300        0.12    12           0.01   1       22.1912
          Chemical: Thickness=[150, 150, 300, 300, 300, 300, 300]; PH=[8, 8, 8, 8, 8, 8, 8]; PHUnits=Water
          Water: Thickness=[150, 150, 300, 300, 300, 300, 300]; InitialPAWmm=361.245; RelativeTo=LL15; FilledFromTop=false
            InitialValues=[0.521, 0.496723, 0.488438, 0.480297, 0.471584, 0.457071, 0.452332]
          CERESSoilTemperature Temperature
          Nutrient
          Solute NO3: Thickness=[150, 150, 300, 300, 300, 300, 300]; InitialValues=[1, 1, 1, 1, 1, 1, 1]; InitialValuesUnits=ppm; WaterTableConcentration=0; D0=0; DepthConstant=0; MaxDepthSoluteAccessible=0; RunoffEffectivenessAtMovingSolute=0; MaxEffectiveRunoff=0
          Solute NH4: Thickness=[150, 150, 300, 300, 300, 300, 300]; InitialValues=[0.1, 0.1, 0.1, 0.1, 0.1, 0.1, 0.1]; InitialValuesUnits=ppm; WaterTableConcentration=0; D0=0; DepthConstant=0; MaxDepthSoluteAccessible=0; RunoffEffectivenessAtMovingSolute=0; MaxEffectiveRunoff=0
          Solute Urea: Thickness=[150, 150, 300, 300, 300, 300, 300]; InitialValues=[0, 0, 0, 0, 0, 0, 0]; InitialValuesUnits=kg/ha; WaterTableConcentration=0; D0=0; DepthConstant=0; MaxDepthSoluteAccessible=0; RunoffEffectivenessAtMovingSolute=0; MaxEffectiveRunoff=0
        SurfaceOrganicMatter: InitialResidueName=wheat_stubble; InitialResidueType=wheat; InitialResidueMass=500; InitialStandingFraction=0; InitialCPR=0; InitialCNR=100
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