Simulations: Version=159
  Simulation
    Memo
      Script1 publishes(invokes) an XEvent which Script2 receives and writes a message to the summary (hello from x).
      When Script2 receives a DoManagement event it publishes a MyEvent event. Script1 receives myEvent and writes a message to the summary (received myEvent).
    Clock: Start=1900-01-01; End=1900-01-10
    Summary SummaryFile
    Manager Script1
```csharp
using System;
using Models.Core;

namespace Models
{
	// This script publishes a statically-named event called XEvent. It also
	// subscribes to an event called "MyEvent".
    [Serializable]
    public class Script1 : Model
    {
    	[Link] private ISummary summary;
        public event EventHandler XEvent;

        [EventSubscribe("DoManagement")]
        private void Daily(object sender, EventArgs e)
        {
            if (XEvent != null)
            	XEvent.Invoke(this, EventArgs.Empty);
        }

		[EventSubscribe("MyEvent")]
		private void OnMyEvent(object x, EventArgs y)
		{
			summary.WriteMessage(this, "received MyEvent", MessageType.Information);
		}
    }
}
```
    Manager Script2
```csharp
using System;
using Models.Core;

namespace Models
{
	// This script receives an event called XEvent which is invoked in Script1.
	// It also generates a dynamically-named event (name could be determined at simulation runtime).
    [Serializable]
    public class Script2 : Model
    {
        [Link] private Script1 script1;
        [Link] private ISummary summary;

        [EventSubscribe("StartOfSimulation")]
        private void OnSimulationCommencing(object sender, EventArgs e)
        {
            script1.XEvent += OnX;
        }
        private void OnX(object x, EventArgs y)
        {
        	Console.WriteLine("OnX");
        	summary.WriteMessage(this, "Hello from X", MessageType.Information);
        }

        [EventSubscribe("DoManagement")]
        private void OnDoManagement(object sender, EventArgs e)
        {
            var events = new Events(this);
            events.Publish("MyEvent", new object[] { this, EventArgs.Empty });
        }
        
    }
}
```
  DataStore
