Simulations: Version=123
  DataStore
  Replacements
    Plant Weed: PlantType=Wheat; IsAlive=false; IsEnding=false; DaysAfterEnding=0
      OrganArbitrator Arbitrator
        BiomassTypeArbitrator DMArbitration
          Folder PotentialPartitioningMethods
            ReallocationMethod
            AllocateFixationMethod
            RetranslocationMethod
            SendPotentialDMAllocationsMethod
          Folder AllocationMethods
            NutrientConstrainedAllocationMethod
            DryMatterAllocationsMethod
          RelativeAllocation ArbitrationMethod
        BiomassTypeArbitrator NArbitration
          Folder PotentialPartitioningMethods
            ReallocationMethod
          Folder ActualPartitioningMethods
            AllocateFixationMethod
            RetranslocationMethod
          Folder AllocationMethods
            NitrogenAllocationsMethod
          RelativeAllocation ArbitrationMethod
          AllocateUptakesMethod
        WaterUptakeMethod
        NitrogenUptakeMethod
      Phenology
        Memo
          Wheat exhibits a range of developmental responses to environment and these are strongly influences by genotype characteristics.
          Temperature effects development increasing development rates and decreasing phase durations as temperatures increase.  Theset affects are captured by thermal time, .  However, wheat also exhibits vernalisation and photoperiod sensitivities in its Vegetative phase and further photoperiod sensitivity in the EarlyReproducivePhase.  Photoperiod responses are seen as a reduction in the length of a phase for a photoperiod sensitive genotype in response to a longer photoperiod.  Vernalisation responses are more complicated as they are driven by temperature but interact with photoperiod.  For vernalisation sensitive varieties (Winter types) exposure to cool temperatures or short photoperiods during the Vegetative phase will reduce the thermal time duration of the vegetative phase.

          We draw on the Kirby Framework to capture these vernalisation and photoperiod responses.  This framework assumes that the timing of anthesis is a result of the timing of flag leaf and an additional thermal time passage from there to anthesis.  It also assumes the timing of flag leaf is a result of the Final Leaf Number which sets a target, and leaf appearance rate, which sets the rate of progress toward this target.  Leaf appearance rate is a function of Thermal time and a genotype specific Phyllochron which changes with Haun stage as described by [Jamieson_LeafAppearance_1995].

          Final Leaf Number (FLN) is modeled as the sum of three numbers:

          FLN = MinLeafNumber + VernalLeaves + PhotoLeaves

          Where MinLeafNumber is the number of leaves that a wheat crop will produce when vernalisation is satisified early in the crops duration (before 2nd true leaf) and it is grown in a long photoperiod..  VernalLeaves are the number of leaves that are added due to vernalisation effects.  For insensitive varieties this will always be zero but this is potentially a larger number for sensitivie varieties and the number progresively decreases as the crop encounters more vernalisation.  PhotoLeaves are the number of leaves that are added to the minimum leaf number as a result of short day exposure.  For insensitive varieties this will be zero but is potential larger for more sensitivie varieties and decreases as day length increases.  More detailed explinations of the components of phenology are provided below.
        DivideFunction MeanTemp
          AddFunction TempSum
            VariableReference MaxT: VariableName=[IWeather].MaxT
            VariableReference MinT: VariableName=[IWeather].MinT
          Constant Two: FixedValue=2
        HourlyInterpolation ThermalTime: agregationMethod=0
          XYPairs Response: X=[0, 26, 37]; Y=[0, 26, 0]
          Memo
            Thermal time determines the rate of developmental progress through many of the crops phases and is used by organs to determing potential growth rates.
          ThreeHourSin InterpolationMethod
        MultiplyFunction DailyVernalisation
          Memo
            Vernalisation responses are based on those described by [Brown_Anthesis_2013].   Vernalisation is assumed to be related to the expression of the Vrn1 Gene.  Its experssion is accumulated daily and daily upregulation as a function of development (DeltaHaunStage) and a TempResponseProfile that declines exponentially from a maximum at 1<sup>o</sup>C to zero at 0<sup>o</sup>C and at 18<sup>o</sup>C.
          VariableReference DeltaHaunStage: VariableName=[Structure].DeltaHaunStage
          HourlyInterpolation TempResponseProfile: agregationMethod=0
            XYPairs Response
              X=[0, 1, 2, 3, 4, 5, 6, 7, 8, 9, 10, 11, 12, 13, 14, 15, 16, 17, 18, 19, 20, 30, 32]
              Y=[0, 1.205, 1.037, 0.893, 0.768, 0.661, 0.569, 0.49, 0.422, 0.363, 0.312, 0.269, 0.231, 0.199, 0.171, 0.148, 0.127, 0.109, 0.094, 0.081, 0, 0, -0.5]
            ThreeHourSin InterpolationMethod
        PhotoperiodFunction Photoperiod: Twilight=-6; DayLength=0
        PhaseLookup PerceivedPhotoPeriod
          PhaseLookupValue ApexBelowGround: Start=Germination; End=Emergence
            Constant Photoperiod: FixedValue=0; Units=h
          PhaseLookupValue ApexAboveGround: Start=Emergence; End=HarvestRipe
            VariableReference Photoperiod: VariableName=[Phenology].Photoperiod
        MinimumFunction Vrn1
          Memo
            Vrn1 accumulation begins when Vrn4 experssion is down regulated to zero and stops, assuming vernalisation saturation, at a value of 1
          Constant Saturation: FixedValue=1; Units=Relative Experssion
          AccumulateFunction CurrentExpression: StartStageName=Germination; EndStageName=TerminalSpikelet; FractionRemovedOnCut=0; FractionRemovedOnHarvest=0; FractionRemovedOnGraze=0; FractionRemovedOnPrune=0
            LessThanFunction Vernalisation
              VariableReference If_Vrn4: VariableName=[Phenology].Vrn4
              VariableReference IsLessThanLag: VariableName=[Phenology].VernLag
              Constant Return_Zero: FixedValue=0
              VariableReference elseReturn_Vernalisation: VariableName=[Phenology].DailyVernalisation
        MinimumFunction Vrn4
          VariableReference MaxExpression: VariableName=[Phenology].VernLag
          AccumulateFunction CurrentExpression: StartStageName=Germination; EndStageName=TerminalSpikelet; FractionRemovedOnCut=0; FractionRemovedOnHarvest=0; FractionRemovedOnGraze=0; FractionRemovedOnPrune=0
            VariableReference VernalisationConditioning: VariableName=[Phenology].DailyVernalisation
        Constant MinimumLeafNumber: FixedValue=7; Units=Leaves
          Memo
            Number of leaves the plant will produce when fully vernalised early and grown in long photoperiod
        Constant VrnSensitivity: FixedValue=0; Units=Leaves
          Memo
            The difference between Inherent earlyness leaf number and the number of leaves produced when the plant is unvernalised and grown in long photoperiod
        Constant VernLag: FixedValue=1; Units=Unitless
          Memo
            The amount of vernalising temperature required before vernalisation response will be evident.  Value of relative to the amount offl vernalisation temperature required from the end of the lag until vernalisation saturation.  A value of 0 means there is no lag, a value of 1 means the lag is the same (in vernal time) as the vernalisation requirement and a value of 2 means the lag is twice as long as the vernalisation response phase
        Constant PpSensitivity: FixedValue=3; Units=Leaves
          Memo
            The reduction in leaf number going from 8 to 16 h Pp
        Constant EarlyReproductivePpSensitivity: FixedValue=0
          Memo
            The phyllochrons duration for the plant to go from flag leaf ligual appearance at 16 h Pp compared to the phyllochron duration for the same phase at 8 h Pp.
        Constant EarlyReproductiveLongDayBase: FixedValue=2.5
          Memo
            The phyllochrons duration for the plant to go from flag leaf ligual appearance at 16 h Pp.
        GerminatingPhase Germinating: Start=Sowing; End=Germination
        EmergingPhase Emerging: ShootLag=40; ShootRate=1.5; Start=Germination; End=Emergence; TTForTimeStep=0
          VariableReference ThermalTime: VariableName=[Phenology].ThermalTime
        NodeNumberPhase Vegetative: Start=Emergence; End=TerminalSpikelet
          VariableReference ThermalTime: VariableName=[Phenology].ThermalTime
          VariableReference CompletionNodeNumber: VariableName=[Structure].HaunStageTerminalSpikelet
          VariableReference LeafTipNumber: VariableName=[Structure].LeafTipsAppeared
        LeafAppearancePhase StemElongation: Start=TerminalSpikelet; End=FlagLeaf
          Memo
            The Final leaf number is fixed at Terminal Spikelet and leaves contune to appear at a rate set by thermal time and phyllochron until flag leaf liguale appears and this phase is completed.
          VariableReference ThermalTime: VariableName=[Phenology].ThermalTime
          VariableReference FinalLeafNumber: VariableName=[Structure].FinalLeafNumber
          ExpressionFunction LeafNumber
            Expression=[Leaf].ExpandedCohortNo + [Leaf].NextExpandingLeafProportion
          VariableReference FullyExpandedLeafNo: VariableName=[Leaf].ExpandedCohortNo
          VariableReference InitialisedLeafNumber: VariableName=[Leaf].InitialisedCohortNo
        GenericPhase EarlyReproductive: Start=FlagLeaf; End=Flowering
          VariableReference Progression: VariableName=[Phenology].ThermalTime
          MultiplyFunction Target
            VariableReference Phyllochron: VariableName=[Structure].Phyllochron.BasePhyllochron
            AddFunction Phyllochrons
              VariableReference LongDayBase: VariableName=[Phenology].EarlyReproductiveLongDayBase
              MultiplyFunction IncreaseDueToShortPhotoPeriod
                LinearInterpolationFunction PhotoPeriodResponse
                  XYPairs: X=[11, 16]; Y=[1, 0]
                  VariableReference XValue: VariableName=[Phenology].Photoperiod
                VariableReference PpSensitivity: VariableName=[Phenology].EarlyReproductivePpSensitivity
        GenericPhase GrainDevelopment: Start=Flowering; End=StartGrainFill
          Constant Target: FixedValue=120
          VariableReference Progression: VariableName=[Phenology].ThermalTime
        GenericPhase GrainFilling: Start=StartGrainFill; End=EndGrainFill
          Constant Target: FixedValue=545
          VariableReference Progression: VariableName=[Phenology].ThermalTime
        GenericPhase Maturing: Start=EndGrainFill; End=Maturity
          Constant Target: FixedValue=35
          VariableReference Progression: VariableName=[Phenology].ThermalTime
        GenericPhase Ripening: Start=Maturity; End=HarvestRipe
          Constant Target: FixedValue=300
          VariableReference Progression: VariableName=[Phenology].ThermalTime
        EndPhase ReadyForHarvesting: Start=HarvestRipe; End=Unused
          VariableReference ThermalTime: VariableName=[Phenology].ThermalTime
        ZadokPMF Zadok
        OnEventFunction FlagLeafDAS: SetEvent=FlagLeaf; ReSetEvent=never
          Memo
            A function is used to provide flowering date as days after sowing(DAS).
          Constant PreEventValue: FixedValue=0
          VariableReference PostEventValue: VariableName=[Plant].DaysAfterSowing
        OnEventFunction FloweringDAS: SetEvent=Flowering; ReSetEvent=never
          Memo
            A function is used to provide flowering date as days after sowing(DAS).
          Constant PreEventValue: FixedValue=0
          VariableReference PostEventValue: VariableName=[Plant].DaysAfterSowing
        OnEventFunction MaturityDAS: SetEvent=Maturity; ReSetEvent=never
          Memo
            A function is used to provide maturity date as days after sowing(DAS).
          Constant PreEventValue: FixedValue=0
          VariableReference PostEventValue: VariableName=[Plant].DaysAfterSowing
      Structure: CohortInitialisationStage=Germination; LeafInitialisationStage=Emergence
        VariableReference ThermalTime: VariableName=[Phenology].ThermalTime
        MultiplyFunction Phyllochron
          Memo Rational
            This is the thermal time between the emergence of leaf tips.  The model used here is based on [Jamieson_SIRIUS_1998] where leaf appearace could be described by a base phyllochron determined between leaves 2 and 7 and a phyllochron that was 70% of base phyllochron for leaves < 2 and 130% of base phyllochron for leaves > 7
          LinearInterpolationFunction LeafStageFactor
            XYPairs: X=[0, 2, 3, 7, 8, 11, 12]; Y=[0.75, 0.75, 1, 1, 1.4, 1.4, 1.4]
            VariableReference XValue: VariableName=[Leaf].AppearedCohortNo
          Constant BasePhyllochron: FixedValue=120; Units=oC.d
          LinearInterpolationFunction PhotoPeriodEffect
            XYPairs: X=[8, 12, 14]; Y=[1.6, 1, 1]
            VariableReference XValue: VariableName=[Phenology].Photoperiod
        MultiplyFunction BranchingRate
          Memo
            Potential branching rate is determined by the commonly observed pattern of tillering in wheat, in which each tiller emerges with the third leaf on its parent axis (e.g. first tiller emerges at the same time as the third leaf on the main stem, the first secondary tiller appears with the third leaf on tiller 1).  This is described as a simple function of main stem leaf number.
          PhaseLookup PotentialBranchingRate
            PhaseLookupValue Vegetative: Start=Emergence; End=TerminalSpikelet
              LinearInterpolationFunction PotentialBranchingRate
                XYPairs: X=[1, 2, 3, 4, 5, 6, 7, 8]; Y=[0, 0, 1, 2, 4, 7, 12, 20]
                VariableReference XValue: VariableName=[Structure].LeafTipsAppeared
            PhaseLookupValue Reproductive: Start=TerminalSpikelet; End=HarvestRipe
              Constant Zero: FixedValue=0
          MinimumFunction StressFactors
            LinearInterpolationFunction NitrogenEffect
              Memo
                Inadequate Nitrogen supply is assumed to affect tillering prior to any effect on photosynthesis or leaf size.
              XYPairs: X=[0.5, 2, 3]; Y=[0, 1, 1]
              VariableReference XValue: VariableName=[Arbitrator].FN
            LinearInterpolationFunction CoverEffect
              Memo
                Tillering is said to cease once a threshold fraction of incoming radiation has been achieved.  This captures shading effects on tillering described by [evers2006cessation].
              XYPairs: X=[0, 0.1, 0.25]; Y=[1, 1, 0]
              VariableReference XValue: VariableName=[Leaf].CoverTotal
            LinearInterpolationFunction WaterStressEffect
              XYPairs: X=[0, 1]; Y=[0, 1]
              VariableReference XValue: VariableName=[Root].WaterTensionFactor
        PhaseLookup BranchMortality
          PhaseLookupValue MortalityPhase: Start=FlagLeaf; End=Flowering
            MultiplyFunction Mortality
              LinearInterpolationFunction MortalityPerDegDay
                XYPairs: X=[0, 0.005]; Y=[0.002, 0]
                VariableReference XValue: VariableName=[Structure].MeanTillerGrowthRate
              VariableReference ThermalTime: VariableName=[Phenology].ThermalTime
        HeightFunction HeightModel
          LinearInterpolationFunction PotentialHeight
            XYPairs: X=[3, 4, 5, 6, 7]; Y=[10, 200, 1000, 1100, 1200]
            VariableReference XValue: VariableName=[Phenology].Stage
          LinearInterpolationFunction WaterStress
            XYPairs: X=[0.3, 1]; Y=[0, 1]
            VariableReference XValue: VariableName=[Leaf].Fw
        MovingAverageFunction MeanTillerGrowthRate: NumberOfDays=5; StageToStartMovingAverage=Emergence
          Memo
            This is calculated to represent the supply of asslimilate to individual tillers over the past 5 days to use as an index to determine tiller mortality.  When tiller numbers are high or total crop assimilate supply is small there will not be enough assimilate to maintain all of the tillers so the model will senesce some.
          DivideFunction TillerGrowthRate
            VariableReference DailyGrowth: VariableName=[Arbitrator].DM.TotalFixationSupply
            VariableReference ThermalTime: VariableName=[Phenology].ThermalTime
            VariableReference StemPopulation: VariableName=[Structure].TotalStemPopn
        MovingAverageFunction MeanPhyllochron: NumberOfDays=300; StageToStartMovingAverage=Emergence
          VariableReference Phyllochron: VariableName=[Structure].Phyllochron
        HoldFunction FinalLeafNumber: WhenToHold=TerminalSpikelet
          AddFunction FinalNodeNumber
            VariableReference MinLeafNumber: VariableName=[Phenology].MinimumLeafNumber
            MultiplyFunction VernalLeaves
              VariableReference UnVernalisedLeaves: VariableName=[Phenology].VrnSensitivity
              SubtractFunction VernalisationReductionFactor
                Constant One: FixedValue=1
                VariableReference RelativeVrn1Expression: VariableName=[Phenology].Vrn1
            MultiplyFunction PhotoPLeaves
              VariableReference ShortPpLeaves: VariableName=[Phenology].PpSensitivity
              LinearInterpolationFunction PhotoPeriodReductionFactor
                XYPairs: X=[10, 16]; Y=[1, 0]
                VariableReference XValue: VariableName=[Phenology].Photoperiod
        ExpressionFunction HaunStageTerminalSpikelet: Expression=([Structure].FinalLeafNumber - 2.85)/1.1
          Memo
            The Haun stage at which Terminal Spikelet occurs is determined from final leaf number using the approach described in [Brown_Anthesis_2013].
        AddFunction HaunStage
          VariableReference AppearedLeaves: VariableName=[Leaf].ExpandedCohortNo
          VariableReference ProportionOfExpandingLeaf: VariableName=[Leaf].NextExpandingLeafProportion
        Constant StemSenescenceAge: FixedValue=0
      ReproductiveOrgan Grain: GrowthRespiration=0; MaintenanceRespiration=0; RipeStage=Ripe
        Biomass Live: DMDOfStructural=0.6
        Biomass Dead: DMDOfStructural=0.6
        HoldFunction NumberFunction: WhenToHold=Flowering
          MultiplyFunction GrainNumber
            Constant GrainsPerGramOfStem: FixedValue=26; Units=grains
            VariableReference StemMass: VariableName=[StemPlusSpike].Wt
        Constant DMConversionEfficiency: FixedValue=1
        Constant RemobilisationCost: FixedValue=0
        Constant InitialGrainProportion: FixedValue=0.05
        Constant MaximumPotentialGrainSize: FixedValue=0.05; Units=g
        PhaseLookup DMDemandFunction
          PhaseLookupValue InitialPhase: Start=Flowering; End=StartGrainFill
            FillingRateFunction
              VariableReference NumberFunction: VariableName=[Grain].NumberFunction
              VariableReference FillingDuration: VariableName=[Phenology].GrainDevelopment.Target
              VariableReference ThermalTime: VariableName=[Phenology].ThermalTime
              MultiplyFunction PotentialSizeIncrement
                VariableReference InitialProportion: VariableName=[Grain].InitialGrainProportion
                VariableReference MaximumSize: VariableName=[Grain].MaximumPotentialGrainSize
          PhaseLookupValue LinearPhase: Start=StartGrainFill; End=EndGrainFill
            FillingRateFunction
              VariableReference NumberFunction: VariableName=[Grain].NumberFunction
              VariableReference FillingDuration: VariableName=[Phenology].GrainFilling.Target
              VariableReference ThermalTime: VariableName=[Phenology].ThermalTime
              MultiplyFunction PotentialSizeIncrement
                SubtractFunction ProportionLinearPhase
                  Constant One: FixedValue=1
                  VariableReference InitialProportion: VariableName=[Grain].InitialGrainProportion
                VariableReference MaximumSize: VariableName=[Grain].MaximumPotentialGrainSize
        Constant MinimumNConc: FixedValue=0.0123
        Constant MaxNConcDailyGrowth: FixedValue=0.03
        Constant MaximumNConc: FixedValue=0.03
        PhaseLookup NFillingRate
          PhaseLookupValue GrainFilling: Start=Flowering; End=EndGrainFill
            FillingRateFunction
              VariableReference NumberFunction: VariableName=[Grain].NumberFunction
              AddFunction FillingDuration
                VariableReference FloweringToGrainFilling: VariableName=[Phenology].GrainDevelopment.Target
                VariableReference GrainFilling: VariableName=[Phenology].GrainFilling.Target
              VariableReference ThermalTime: VariableName=[Phenology].ThermalTime
              MultiplyFunction PotentialSizeIncrement
                VariableReference MaximumSize: VariableName=[Grain].MaximumPotentialGrainSize
                VariableReference MaximumNConc: VariableName=[Grain].MaximumNConc
        Constant WaterContent: FixedValue=0.12
        AccumulateFunction AccumThermalTime: StartStageName=Flowering; EndStageName=Maturity; FractionRemovedOnCut=0; FractionRemovedOnHarvest=0; FractionRemovedOnGraze=0; FractionRemovedOnPrune=0
          VariableReference DailyThermalTimeValue: VariableName=[Phenology].ThermalTime
        ExpressionFunction Protein
          Expression=([Grain].Live.N + [Grain].Dead.N)/([Grain].Live.Wt + [Grain].Dead.Wt) * 100 * 5.71
        BiomassRemoval BiomassRemovalDefaults
          OrganBiomassRemovalType Harvest: FractionLiveToRemove=1; FractionDeadToRemove=0; FractionLiveToResidue=0; FractionDeadToResidue=0
          OrganBiomassRemovalType Cut: FractionLiveToRemove=1; FractionDeadToRemove=0; FractionLiveToResidue=0; FractionDeadToResidue=0
          OrganBiomassRemovalType Prune: FractionLiveToRemove=0; FractionDeadToRemove=0; FractionLiveToResidue=0.8; FractionDeadToResidue=0
          OrganBiomassRemovalType Graze: FractionLiveToRemove=0.6; FractionDeadToRemove=0; FractionLiveToResidue=0.2; FractionDeadToResidue=0
          OrganBiomassRemovalType Thin: FractionLiveToRemove=0; FractionDeadToRemove=0; FractionLiveToResidue=0.05; FractionDeadToResidue=0
        Constant CarbonConcentration: FixedValue=0.4
      Root: GrowthRespiration=0; MaintenanceRespiration=0
        RootShapeCylindre RootShape
        Constant DMConversionEfficiency: FixedValue=1
        Constant RemobilisationCost: FixedValue=0
        Constant KLModifier: FixedValue=1
        Constant SoilWaterEffect: FixedValue=1
        Constant MaxDailyNUptake: FixedValue=20
        Constant SenescenceRate: FixedValue=0.005
        Constant MaximumRootDepth: FixedValue=1000000
        Constant MaximumNConc: FixedValue=0.01
        Constant MinimumNConc: FixedValue=0.01
        PhaseLookupValue NitrogenDemandSwitch: Start=Germination; End=Maturity
          Constant: FixedValue=1
        BiomassRemoval BiomassRemovalDefaults
          OrganBiomassRemovalType Harvest: FractionLiveToRemove=0; FractionDeadToRemove=0; FractionLiveToResidue=0.2; FractionDeadToResidue=0
          OrganBiomassRemovalType Cut: FractionLiveToRemove=0; FractionDeadToRemove=0; FractionLiveToResidue=0.3; FractionDeadToResidue=0
          OrganBiomassRemovalType Prune: FractionLiveToRemove=0; FractionDeadToRemove=0; FractionLiveToResidue=0.1; FractionDeadToResidue=0
          OrganBiomassRemovalType Graze: FractionLiveToRemove=0; FractionDeadToRemove=0; FractionLiveToResidue=0.15; FractionDeadToResidue=0
          OrganBiomassRemovalType Thin: FractionLiveToRemove=0; FractionDeadToRemove=0; FractionLiveToResidue=0.05; FractionDeadToResidue=0
        Constant KNO3: FixedValue=0.02
        Constant KNH4: FixedValue=0.01
        Constant SpecificRootLength: FixedValue=105; Units=m/g
        MultiplyFunction RootFrontVelocity
          PhaseLookup PotentialRootFrontVelocity
            PhaseLookupValue PreEmergence: Start=Germination; End=Emergence
              Constant Value: FixedValue=5; Units=mm/d
            PhaseLookupValue PostEmergence: Start=Emergence; End=Maturity
              Constant Value: FixedValue=20; Units=mm/d
          WeightedTemperatureFunction TemperatureFactor: MaximumTemperatureWeighting=0.5
            XYPairs: X=[0, 15, 25, 35]; Y=[0, 1, 1, 0]
          LinearInterpolationFunction WaterFactor
            SoilWaterScale
            XYPairs: X=[0, 0.25, 1]; Y=[0, 1, 1]
            VariableReference XValue: VariableName=[SoilWaterScale]
        LinearInterpolationFunction NUptakeSWFactor
          SoilWaterScale
          XYPairs: X=[0, 1]; Y=[0, 1]
          Memo
            This is modelled in the same way as the old wheat model where potential N uptake is decreased as the soil dries as described by NUptakeSWFactor
          VariableReference XValue: VariableName=[SoilWaterScale]
        Constant CarbonConcentration: FixedValue=0.4
        Constant MaintenanceRespirationFunction: FixedValue=0
        BiomassDemand DMDemands
          MultiplyFunction Structural
            PartitionFractionDemandFunction DMDemandFunction
              PhaseLookup PartitionFraction
                PhaseLookupValue PreEmergence: Start=Germination; End=Emergence
                  Constant Value: FixedValue=0
                PhaseLookupValue PreFlowering: Start=Emergence; End=Flowering
                  LinearInterpolationFunction AgeFactor
                    XYPairs: X=[3, 4]; Y=[0.5, 0.2]
                    VariableReference XValue: VariableName=[Phenology].Stage
                PhaseLookupValue PostFlowering: Start=Flowering; End=EndGrainFill
                  Constant Value: FixedValue=0.2
            Constant StructuralFraction: FixedValue=1
          Constant Metabolic: FixedValue=0
          StorageDMDemandFunction Storage
            SubtractFunction StorageFraction
              Constant One: FixedValue=1
              VariableReference StructuralFraction: VariableName=[Root].DMDemands.Structural.StructuralFraction
        BiomassDemand NDemands
          MultiplyFunction Structural
            VariableReference MinNconc: VariableName=[Root].minimumNconc
            VariableReference PotentialDMAllocation: VariableName=[Root].potentialDMAllocation.Structural
          MultiplyFunction Metabolic
            SubtractFunction MetabolicNconc
              VariableReference CritNconc: VariableName=[Root].criticalNConc
              VariableReference MinNconc: VariableName=[Root].minimumNconc
            VariableReference PotentialDMAllocation: VariableName=[Root].potentialDMAllocation.Structural
          StorageNDemandFunction Storage
            VariableReference NitrogenDemandSwitch: VariableName=[Root].nitrogenDemandSwitch
            VariableReference MaxNconc: VariableName=[Root].maximumNconc
        VariableReference CriticalNConc: VariableName=[Root].MinimumNConc
        BiomassDemand InitialWt
          Constant Structural: FixedValue=0.005; Units=g/plant
          Constant Metabolic: FixedValue=0
          Constant Storage: FixedValue=0
        Constant RootDepthStressFactor: FixedValue=1
      Leaf: MaxCover=1; Albedo=0.25; Gsmax350=0.011; R50=150; KDead=0.3; MaximumMainStemLeafNumber=30
        zero: CurrentExpandingLeaf, StartFractionExpanded, FractionNextleafExpanded, DeadNodesYesterday, GrowthRespiration, LAI, Depth, Width, FRGR, PotentialEP, WaterDemand, TipsAtEmergence, CohortsAtInitialisation, FractionDied
        LeafCohort InitialLeaves[1]: Rank=1; Area=200
          zero: NReallocationFactor, DMReallocationFactor, NRetranslocationFactor, DMRetranslocationFactor, ShadeInducedSenRate, SenescedFrac, DeltaPotentialArea, DeltaStressConstrainedArea, DeltaCarbonConstrainedArea, PotentialStructuralDMAllocation, PotentialMetabolicDMAllocation, MetabolicNReallocated, MetabolicWtReallocated, StorageNReallocated, StorageWtReallocated, MetabolicNRetranslocated, StorageNRetrasnlocated, DMRetranslocated, MetabolicNAllocation, StructuralDMAllocation, MetabolicDMAllocation, MaintenanceRespiration
        LeafCohort InitialLeaves[2]: Rank=2
          zero: NReallocationFactor, DMReallocationFactor, NRetranslocationFactor, DMRetranslocationFactor, ShadeInducedSenRate, SenescedFrac, DeltaPotentialArea, DeltaStressConstrainedArea, DeltaCarbonConstrainedArea, PotentialStructuralDMAllocation, PotentialMetabolicDMAllocation, MetabolicNReallocated, MetabolicWtReallocated, StorageNReallocated, StorageWtReallocated, MetabolicNRetranslocated, StorageNRetrasnlocated, DMRetranslocated, MetabolicNAllocation, StructuralDMAllocation, MetabolicDMAllocation, Area, MaintenanceRespiration
        LeafCohortParameters CohortParameters: ExpansionStressValue=0; CellDivisionStressValue=0; DroughtInducedLagAccelerationValue=0; DroughtInducedSenAccelerationValue=0; ShadeInducedSenescenceRateValue=0; SenessingLeafRelativeSizeValue=0
          Constant NReallocationFactor: FixedValue=1
          Constant RemobilisationCost: FixedValue=0
          Constant MaintenanceRespirationFunction: FixedValue=0
          Constant NRetranslocationFactor: FixedValue=0.03
          Constant DMReallocationFactor: FixedValue=1
          Constant DMRetranslocationFactor: FixedValue=1
          MinimumFunction CellDivisionStress
            LinearInterpolationFunction WaterStressEffect
              XYPairs: X=[0.5, 1]; Y=[0.1, 1]
              VariableReference XValue: VariableName=[Leaf].Fw
            LinearInterpolationFunction NitrogenStressEffect
              XYPairs: X=[0, 0.5, 1]; Y=[0.1, 0.1, 1]
              VariableReference XValue: VariableName=[Wheat].Leaf.Fn
          MinimumFunction ExpansionStress
            LinearInterpolationFunction WaterStressEffect
              XYPairs: X=[0.1, 1.1, 1.3]; Y=[0, 1, 1]
              VariableReference XValue: VariableName=[Root].WaterTensionFactor
            LinearInterpolationFunction TemperatureEffect
              XYPairs: X=[0, 12, 14]; Y=[0, 1, 1]
              VariableReference XValue: VariableName=[Phenology].MeanTemp
            LinearInterpolationFunction NitrogenStressEffect
              XYPairs: X=[0, 0.5, 1]; Y=[0.1, 0.1, 1]
              VariableReference XValue: VariableName=[Wheat].Leaf.Fn
          MultiplyFunction MaxArea
            Constant AreaLargestLeaves: FixedValue=2600; Units=mm^2
            LinearInterpolationFunction AgeFactor
              XYPairs: X=[3, 3.45, 4]; Y=[0.1, 0.5, 1]
              VariableReference XValue: VariableName=[Phenology].Stage
          MultiplyFunction GrowthDuration
            Constant Multiplier: FixedValue=1.3
            VariableReference Phyllochron: VariableName=[Structure].Phyllochron
          MultiplyFunction LagDuration
            LinearInterpolationFunction AgeFactor
              XYPairs: X=[3, 4]; Y=[0.4, 1]
              VariableReference XValue: VariableName=[Phenology].Stage
            SubtractFunction LastLeafDuration
              AddFunction ThermalTimeToRipe
                VariableReference EarlyReproductive: VariableName=[Phenology].EarlyReproductive.Target
                VariableReference GrainDevelopment: VariableName=[Phenology].GrainDevelopment.Target
                VariableReference GrainFilling: VariableName=[Phenology].GrainFilling.Target
                VariableReference Maturing: VariableName=[Phenology].Maturing.Target
                VariableReference Ripening: VariableName=[Phenology].Ripening.Target
              VariableReference SenescenceDuration: VariableName=[Leaf].CohortParameters.SenescenceDuration
          MultiplyFunction SenescenceDuration
            Constant Multiplier: FixedValue=3
            VariableReference Phyllochron: VariableName=[Structure].Phyllochron
          Constant DetachmentLagDuration: FixedValue=1000000
          Constant DetachmentDuration: FixedValue=1000000
          Constant RelativeBranchLeafSize: FixedValue=1
          LinearInterpolationFunction MaximumNConc
            XYPairs: X=[3, 4, 6]; Y=[0.05, 0.05, 0.02]
            VariableReference XValue: VariableName=[Phenology].Stage
          MultiplyFunction CriticalNConc
            LinearInterpolationFunction CriticalNConcAt350ppm
              XYPairs: X=[3, 4, 6]; Y=[0.04, 0.04, 0.015]
              VariableReference XValue: VariableName=[Phenology].Stage
            LinearInterpolationFunction CO2Factor
              XYPairs: X=[350, 700]; Y=[1, 0.93]
              VariableReference XValue: VariableName=[IWeather].CO2
          LinearInterpolationFunction MinimumNConc
            XYPairs: X=[3, 4, 6]; Y=[0.01, 0.01, 0.01]
            VariableReference XValue: VariableName=[Phenology].Stage
          AddFunction DroughtInducedLagAcceleration
            Constant One: FixedValue=1
            MultiplyFunction Stress
              Constant StressResponseCoefficient: FixedValue=1
              LinearInterpolationFunction StressFactor
                XYPairs: X=[0, 1]; Y=[2, 0]
                VariableReference XValue: VariableName=[Leaf].Fw
          AddFunction DroughtInducedSenAcceleration: same as Replacements.Weed.Leaf.CohortParameters.DroughtInducedLagAcceleration
          LinearInterpolationFunction SpecificLeafAreaMax
            XYPairs: X=[3, 4, 6]; Y=[17000, 20000, 17000]
            VariableReference XValue: VariableName=[Phenology].Stage
          LinearInterpolationFunction SpecificLeafAreaMin
            XYPairs: X=[0.4, 1]; Y=[14000, 14000]
            VariableReference XValue: VariableName=[Leaf].Fn
          Constant InitialNConc: FixedValue=0
          Constant StructuralFraction: FixedValue=0.5
          Constant StorageFraction: FixedValue=0.3
          Constant LeafSizeShapeParameter: FixedValue=0.3
          Constant SenessingLeafRelativeSize: FixedValue=1; Units=0-1
          MultiplyFunction ShadeInducedSenescenceRate
            Constant RatePerDegDay: FixedValue=0
              Memo
                1% per degree day means it takes one phyllochron for a shaded leaf to fully sceness
            VariableReference ThermalTime: VariableName=[Phenology].ThermalTime
          ArrayFunction LagDurationAgeMultiplier: Values=1 1 1
          ArrayFunction SenescenceDurationAgeMultiplier: Values=1 1 1
          ArrayFunction LeafSizeAgeMultiplier: Values=1 1 1 1 1 1 1 1 1 1 1 1
        RUEModel Photosynthesis
          Constant RUE: FixedValue=1.5
          WeightedTemperatureFunction FT: MaximumTemperatureWeighting=0.75
            XYPairs: X=[0, 15, 25, 35]; Y=[0, 1, 1, 0]
          LinearInterpolationFunction FN
            XYPairs: X=[0, 1, 1.5]; Y=[0, 1, 1]
            VariableReference XValue: VariableName=[Leaf].Fn
          LinearInterpolationFunction FW
            XYPairs: X=[0, 1, 1]; Y=[0, 1, 1]
            VariableReference XValue: VariableName=[Leaf].Fw
          LinearInterpolationFunction FVPD
            XYPairs: X=[0, 10, 40]; Y=[1, 1, 0]
            VariableReference XValue: VariableName=[Photosynthesis].VPD
          RUECO2Function FCO2: PhotosyntheticPathway=C3
          VariableReference RadnInt: VariableName=[Leaf].RadIntTot
        Constant FrostFraction: FixedValue=0
        Constant RemobilisationCost: FixedValue=0
        VariableReference ThermalTime: VariableName=[Phenology].ThermalTime
        MinimumFunction FRGRFunction
          VariableReference RUE_FT: VariableName=[Leaf].Photosynthesis.FT
          MinimumFunction Others
            VariableReference RUE_FN: VariableName=[Leaf].Photosynthesis.FN
            VariableReference RUE_FVPD: VariableName=[Leaf].Photosynthesis.FVPD
        BiomassRemoval BiomassRemovalDefaults
          OrganBiomassRemovalType Harvest: FractionLiveToRemove=0; FractionDeadToRemove=0; FractionLiveToResidue=0.3; FractionDeadToResidue=0.3
          OrganBiomassRemovalType Cut: FractionLiveToRemove=0.8; FractionDeadToRemove=0.8; FractionLiveToResidue=0; FractionDeadToResidue=0
          OrganBiomassRemovalType Prune: FractionLiveToRemove=0; FractionDeadToRemove=0; FractionLiveToResidue=0.6; FractionDeadToResidue=0.6
          OrganBiomassRemovalType Graze: FractionLiveToRemove=0.6; FractionDeadToRemove=0.6; FractionLiveToResidue=0.1; FractionDeadToResidue=0.1
          OrganBiomassRemovalType Thin: FractionLiveToRemove=0; FractionDeadToRemove=0; FractionLiveToResidue=0.05; FractionDeadToResidue=0.05
        MultiplyFunction ExtinctionCoeff
          Constant VegetativePhase: FixedValue=0.5
          LinearInterpolationFunction DevelopmentFactor
            XYPairs: X=[3, 4.7, 5]; Y=[1, 1, 1.2]
            Memo
              Exntiction coefficient increases at stem extension as leaves become more prostrate
            VariableReference XValue: VariableName=[Phenology].Stage
        Constant StructuralFraction: FixedValue=0.5
        Constant DMConversionEfficiency: FixedValue=1
        Constant CarbonConcentration: FixedValue=0.4
        Constant StomatalConductanceCO2Modifier: FixedValue=1
        Constant WidthFunction: FixedValue=0
        VariableReference DepthFunction: VariableName=[Leaf].Height
      GenericOrgan Spike: IsAboveGround=true
        Constant NReallocationFactor: FixedValue=0
        Constant RemobilisationCost: FixedValue=0
        PhaseLookup NRetranslocationFactor
          PhaseLookupValue EarlyGrowth: Start=Emergence; End=StartGrainFill
            Constant ValueDuringEarlyGrowth: FixedValue=0
          PhaseLookupValue ReproductiveGrowth: Start=StartGrainFill; End=EndGrainFill
            Constant ValueDuringGrainFill: FixedValue=0.5
        LinearInterpolationFunction MaximumNConc
          XYPairs: X=[4, 4.5, 5.5, 6]; Y=[0.01, 0.01, 0.025, 0.025]
          VariableReference XValue: VariableName=[Phenology].Stage
        Constant MinimumNConc: FixedValue=0.004
        BiomassRemoval BiomassRemovalDefaults
          OrganBiomassRemovalType Harvest: FractionLiveToRemove=0.5; FractionDeadToRemove=0; FractionLiveToResidue=0.1; FractionDeadToResidue=0
          OrganBiomassRemovalType Cut: FractionLiveToRemove=0.8; FractionDeadToRemove=0; FractionLiveToResidue=0; FractionDeadToResidue=0
          OrganBiomassRemovalType Prune: FractionLiveToRemove=0; FractionDeadToRemove=0; FractionLiveToResidue=0.6; FractionDeadToResidue=0
          OrganBiomassRemovalType Graze: FractionLiveToRemove=0.6; FractionDeadToRemove=0; FractionLiveToResidue=0.2; FractionDeadToResidue=0
          OrganBiomassRemovalType Thin: FractionLiveToRemove=0; FractionDeadToRemove=0; FractionLiveToResidue=0.05; FractionDeadToResidue=0
        PhaseLookupValue NitrogenDemandSwitch: Start=Emergence; End=StartGrainFill
          Constant: FixedValue=1
        PhaseLookup DMRetranslocationFactor
          PhaseLookupValue VegetativeGrowth: Start=Emergence; End=StartGrainFill
            Constant DMRetranslocationFactor: FixedValue=0
          PhaseLookupValue ReproductiveGrowth: Start=StartGrainFill; End=EndGrainFill
            Constant DMRetranslocationFactor: FixedValue=0.5
        Constant DetachmentRateFunction: FixedValue=0; Units=/d
        Constant MaintenanceRespirationFunction: FixedValue=0; Units=0-1
        Constant DMConversionEfficiency: FixedValue=1; Units=0-1
        VariableReference HeadNumber: VariableName=[Structure].TotalStemPopn
        Constant DMReallocationFactor: FixedValue=0
        AddFunction CriticalNConc
          VariableReference MinimumNConc: VariableName=[Spike].MinimumNConc
          MultiplyFunction MetabolicNconc
            SubtractFunction NonStructuralN
              VariableReference MaximumNConc: VariableName=[Spike].MaximumNConc
              VariableReference MinimumNConc: VariableName=[Spike].MinimumNConc
            Constant Proportion: FixedValue=0.8
        LinearInterpolationFunction SenescenceRate
          XYPairs: X=[3, 4, 5, 6]; Y=[0.07, 0.04, 0.015, 0.012]
          VariableReference XValue: VariableName=[Phenology].Stage
        Constant CarbonConcentration: FixedValue=0.4
        BiomassDemand DMDemands
          MultiplyFunction Structural
            PartitionFractionDemandFunction DMDemandFunction
              LinearInterpolationFunction PartitionFraction
                XYPairs: X=[3, 4, 4.7, 5, 7, 7.000001]; Y=[0, 0, 0.01, 0.7, 0.7, 0]
                VariableReference XValue: VariableName=[Phenology].Stage
            PhaseLookup StructuralFraction
              PhaseLookupValue VegetativeGrowth: Start=Emergence; End=StartGrainFill
                Constant StructuralFractionEG: FixedValue=0.3
              PhaseLookupValue ReproductiveGrowth: Start=StartGrainFill; End=EndGrainFill
                Constant StructuralFractionGF: FixedValue=0
          Constant Metabolic: FixedValue=0
          StorageDMDemandFunction Storage
            SubtractFunction StorageFraction
              Constant One: FixedValue=1
              VariableReference StructuralFraction: VariableName=[Spike].DMDemands.Structural.StructuralFraction
        BiomassDemand NDemands
          MultiplyFunction Structural
            VariableReference MinNconc: VariableName=[Spike].minimumNconc
            VariableReference PotentialDMAllocation: VariableName=[Spike].potentialDMAllocation.Structural
          MultiplyFunction Metabolic
            SubtractFunction MetabolicNconc
              VariableReference CritNconc: VariableName=[Spike].criticalNConc
              VariableReference MinNconc: VariableName=[Spike].minimumNconc
            VariableReference PotentialDMAllocation: VariableName=[Spike].potentialDMAllocation.Structural
          StorageNDemandFunction Storage
            VariableReference NitrogenDemandSwitch: VariableName=[Spike].nitrogenDemandSwitch
            VariableReference MaxNconc: VariableName=[Spike].maximumNconc
        RetranslocateNonStructural RetranslocateNitrogen
        BiomassDemand InitialWt
          Constant Structural: FixedValue=0; Units=g/m^2
          Constant Metabolic: FixedValue=0
          Constant Storage: FixedValue=0
      GenericOrgan Stem: IsAboveGround=true
        LinearInterpolationFunction SenescenceRate
          XYPairs: X=[3, 7, 8, 9]; Y=[0, 0, 0.2, 0.5]
          VariableReference XValue: VariableName=[Phenology].Stage
        Constant RemobilisationCost: FixedValue=0
        LinearInterpolationFunction MaximumNConc
          XYPairs: X=[3, 4, 5, 6]; Y=[0.07, 0.04, 0.015, 0.012]
          VariableReference XValue: VariableName=[Phenology].Stage
        Constant MinimumNConc: FixedValue=0.0025
        PhaseLookupValue NitrogenDemandSwitch: Start=Emergence; End=StartGrainFill
          Constant: FixedValue=1
        Constant NReallocationFactor: FixedValue=0
        PhaseLookup NRetranslocationFactor
          PhaseLookupValue VegetativeGrowth: Start=Sowing; End=Flowering
            Constant Fraction: FixedValue=0
          PhaseLookupValue ReproductiveGrowth: Start=Flowering; End=HarvestRipe
            Constant Fraction: FixedValue=0.5
        PhaseLookup DMRetranslocationFactor: same as Replacements.Weed.Spike.DMRetranslocationFactor
        BiomassRemoval BiomassRemovalDefaults: same as Replacements.Weed.Spike.BiomassRemovalDefaults
        DivideFunction PercentWSC
          VariableReference WSC: VariableName=[Stem].Live.StorageWt
          VariableReference StemWt: VariableName=[Stem].Live.Wt
        Constant DetachmentRateFunction: FixedValue=0; Units=/d
        Constant MaintenanceRespirationFunction: FixedValue=0; Units=0-1
        Constant DMConversionEfficiency: FixedValue=1; Units=0-1
        Constant DMReallocationFactor: FixedValue=0
        AddFunction CriticalNConc
          VariableReference MinimumNConc: VariableName=[Stem].MinimumNConc
          MultiplyFunction MetabolicNconc
            SubtractFunction NonStructuralN
              VariableReference MaximumNConc: VariableName=[Stem].MaximumNConc
              VariableReference MinimumNConc: VariableName=[Stem].MinimumNConc
            Constant Proportion: FixedValue=0.5
        Constant CarbonConcentration: FixedValue=0.4
        BiomassDemand DMDemands
          MultiplyFunction Structural
            PartitionFractionDemandFunction DMDemandFunction
              PhaseLookup PartitionFraction
                PhaseLookupValue PreStemElongation: Start=Emergence; End=TerminalSpikelet
                  Constant StemFraction: FixedValue=0.2
                PhaseLookupValue StemElongation: Start=TerminalSpikelet; End=StartGrainFill
                  Constant StemFraction: FixedValue=0.7; Units=0
                PhaseLookupValue EarEmergence: Start=StartGrainFill; End=HarvestRipe
                  Constant StemFraction: FixedValue=0
            PhaseLookup StructuralFraction
              PhaseLookupValue VegetativeGrowth: Start=Sowing; End=StartGrainFill
                Constant Fraction: FixedValue=0.3
              PhaseLookupValue ReproductiveGrowth: Start=StartGrainFill; End=HarvestRipe
                Constant Fraction: FixedValue=0.01
          Constant Metabolic: FixedValue=0
          StorageDMDemandFunction Storage
            SubtractFunction StorageFraction
              Constant One: FixedValue=1
              VariableReference StructuralFraction: VariableName=[Stem].DMDemands.Structural.StructuralFraction
        BiomassDemand NDemands
          MultiplyFunction Structural
            VariableReference MinNconc: VariableName=[Stem].minimumNconc
            VariableReference PotentialDMAllocation: VariableName=[Stem].potentialDMAllocation.Structural
          MultiplyFunction Metabolic
            SubtractFunction MetabolicNconc
              VariableReference CritNconc: VariableName=[Stem].criticalNConc
              VariableReference MinNconc: VariableName=[Stem].minimumNconc
            VariableReference PotentialDMAllocation: VariableName=[Stem].potentialDMAllocation.Structural
          StorageNDemandFunction Storage
            VariableReference NitrogenDemandSwitch: VariableName=[Stem].nitrogenDemandSwitch
            VariableReference MaxNconc: VariableName=[Stem].maximumNconc
        RetranslocateNonStructural RetranslocateNitrogen
        BiomassDemand InitialWt
          Constant Structural: FixedValue=0; Units=g/m^2
          Constant Metabolic: FixedValue=0
          Constant Storage: FixedValue=0
      CompositeBiomass AboveGround: DMDOfStructural=0.6
        Propertys=[[Leaf].Live, [Leaf].Dead, [Stem].Live, [Stem].Dead, [Spike].Live, [Spike].Dead, [Grain].Live, [Grain].Dead]
      CompositeBiomass AboveGroundLive: Propertys=[[Leaf].Live, [Stem].Live, [Spike].Live, [Grain].Live]; DMDOfStructural=0.6
      CompositeBiomass AboveGroundDead: Propertys=[[Leaf].Dead, [Stem].Dead, [Spike].Dead, [Grain].Dead]; DMDOfStructural=0.6
      CompositeBiomass BelowGround: Propertys=[[Root].Live, [Root].Dead]; DMDOfStructural=0.6
      CompositeBiomass Total: DMDOfStructural=0.6
        Propertys=[[Leaf].Live, [Leaf].Dead, [Stem].Live, [Stem].Dead, [Root].Live, [Root].Dead, [Spike].Live, [Spike].Dead, [Grain].Live, [Grain].Dead]
      CompositeBiomass TotalLive: DMDOfStructural=0.6
        Propertys=[[Leaf].Live, [Stem].Live, [Root].Live, [Spike].Live, [Grain].Live]
      CompositeBiomass TotalDead: DMDOfStructural=0.6
        Propertys=[[Leaf].Dead, [Stem].Dead, [Root].Dead, [Spike].Dead, [Grain].Dead]
      CompositeBiomass Ear: Propertys=[[Spike].Live, [Grain].Live, [Spike].Dead, [Grain].Dead]; DMDOfStructural=0.6
      CompositeBiomass StemPlusSpike: Propertys=[[Stem].Live, [Spike].Live, [Stem].Dead, [Spike].Dead]; DMDOfStructural=0.6
      CultivarFolder Cultivars
        Cultivar Hartog
          Command:
            [Phenology].MinimumLeafNumber.FixedValue = 8
            [Phenology].VrnSensitivity.FixedValue = 0
            [Phenology].PpSensitivity.FixedValue = 4
            [Structure].Phyllochron.BasePhyllochron.FixedValue = 100
      Constant MortalityRate: FixedValue=0
  Simulation Tutorial_1_0_PseudoAphid_Start
    Clock: Start=2016-01-01; End=2016-12-31
    Summary SummaryFile
    Weather: FileName=normal.met
    MicroClimate: a_interception=0; b_interception=1; c_interception=0; d_interception=0; soil_albedo=0.3; SoilHeatFluxFraction=0.4; MinimumHeightDiffForNewLayer=0; NightInterceptionFraction=0.5; ReferenceHeight=2
    SoilArbitrator
    Zone Field: Area=1; Slope=0; AspectAngle=0; Altitude=50
      Fertiliser
      Soil: ASCOrder=Vertosol; ASCSubOrder=Black; SoilType=Clay; Site=Norwin; NearestTown=Norwin; Region=Darling Downs and Granite Belt; State=Queensland; Country=Australia; NaturalVegetation=Qld. Bluegrass, possible Qld. Blue gum; ApsoilNumber=900; Latitude=-27.581836; Longitude=151.320206; LocationAccuracy=+/- 20m
        DataSource=CSIRO Sustainable Ecosystems, Toowoomba; Characteriesd as part of the GRDC funded project"Doing it better, doing it smarter, managing soil water in Australian agriculture' 2011
        Comments=OC, CLL for all crops estimated-based on Bongeen Mywybilla Soil No1
        Physical
          Thickness  BD       AirDry    LL15      DUL       SAT       KS
          150        1.01056  0.13025   0.2605    0.521     0.588655  20
          150        1.07146  0.198689  0.248362  0.496723  0.565677  20
          300        1.09394  0.28      0.28      0.488438  0.557193  20
          300        1.15861  0.28      0.28      0.480297  0.532787  20
          300        1.17301  0.28      0.28      0.471584  0.527354  20
          300        1.16287  0.28      0.28      0.457071  0.53118   20
          300        1.1875   0.28      0.28      0.452332  0.521888  20
          SoilCrop WheatSoil: LL=[0.261, 0.248, 0.28, 0.306, 0.36, 0.392, 0.446]; KL=[0.06, 0.06, 0.06, 0.04, 0.04, 0.02, 0.01]; XF=[1, 1, 1, 1, 1, 1, 1]
        WaterBalance SoilWater: SummerDate=1-Nov; SummerU=5; SummerCona=5; WinterDate=1-Apr; WinterU=5; WinterCona=5; DiffusConst=40; DiffusSlope=16; Salb=0.12; CN2Bare=73; CNRed=20; CNCov=0.8; Thickness=[150, 150, 300, 300, 300, 300, 300]; SWCON=[0.3, 0.3, 0.3, 0.3, 0.3, 0.3, 0.3]
        Organic: FOMCNRatio=40
          Thickness  Carbon  SoilCNRatio  FBiom  FInert  FOM
          150        1.2     12           0.04   0.4     347.129
          150        0.96    12           0.02   0.6     270.344
          300        0.6     12           0.02   0.8     163.972
          300        0.3     12           0.02   1       99.4541
          300        0.18    12           0.01   1       60.322
          300        0.12    12           0.01   1       36.5871
          300        0.12    12           0.01   1       22.1912
        Chemical
          Thickness  NO3N  NH4N  PH
          150        1     0.1   8
          150        1     0.1   8
          300        1     0.1   8
          300        1     0.1   8
          300        1     0.1   8
          300        1     0.1   8
          300        1     0.1   8
        InitialWater: PercentMethod=1; FractionFull=1
        Sample InitialN: Thickness=[150, 150, 300, 300, 300, 300, 300]; SWUnits=Volumetric; OCUnits=Total; PHUnits=Water
        CERESSoilTemperature Temperature
        Nutrient
      SurfaceOrganicMatter: InitialResidueName=wheat_stubble; InitialResidueType=wheat; InitialResidueMass=500; InitialStandingFraction=0; InitialCPR=0; InitialCNR=100
      Plant Wheat
  Simulation Tutorial_1_1_PseudoAphid_AgeBasedDevt
    Memo
      **The Dymex Pseudo Aphid Tutorials**

      This is a direct copy of the Dymex tutorial and development of a pseudo Aphid model:

      **Dymex v2. Insect Tutorial. https://www.hearne.software/getattachment/0ca7c91f-dbe6-4765-8207-4e1b3f1591f2/Insect-Tutorial.aspx. Accessed 1/4/2019.**

      **Tutorial_1_1_PseudoAphid_AgeBasedDevt (Dymex tutorial 1 Introduction)**

      Tutorial_1_2_PseudoAphid_AgeBasedDevtResults (exploring options to graph results in ApsimX using results from Tutorial_1_1)

      Tutorial_2_1_PseudoAphid_ConstantMetTempDevt (Dymex tutorial 2 Temperature-dependent Development)

      Tutorial_2_2_PseudoAphid_ConstantTempDevt (exploring other options in ApsimX to set a constant temperature)

      Tutorial_2_3_PseudoAphid_MeanFieldTempDevt (Dymex tutorial 3 Changing to Field Temperatures)

      Tutorial_3_1_PseudoAphid_DegreeDayDevt (Dymex tutorial 4 Degree Days)

      Tutorial_4_1_PseudoAphid_3HrlyDevt (exploring the ApsimX capability to simulate degree days based on three-hourly intervals)

      Tutorial_5_1_PseudoAphid_TempDepMortality (Dymex tutorial 5 Mortality)

      Tutorial_6_1_PseudoAphid_DensityDepMortality (Dymex tutorial 6 Density-dependent Mortality)

      Tutorial_7_1_PseudoAphid_DrynessDepMortality (Dymex tutorial 7 Dryness Dependent Mortality)

      Tutorial_8_1_PseudoAphid_DrynessDepMortalitySoil (Dymex tutorial 8 Dryness Dependent Mortality using Soil Moisture)

      In Dymex tutorials 9 and 10, management operations are added to the simulations to spray the PseudoAphids. These tutorials have not been rebuilt here since ApsimX provides for spraying as part of manangement activities that can be applied in any ApsimX simulation.

      Notes are from the Dymex manual and adjusted to describe the processes required in the APSIM population model builder.

      **Each tutorial builds upon the previous one.**

      Unlike Dymex, APSIM provides timing models, climate models, and reporting models so none of these need to be created by the user. However, the model set up described in this section is requred for this and successive tutorials.

      **__________________________________________________________________________________**

      # Tutorial PseudoAphid Age Based Development

      This tutorial is the first in the series for modelling the lifecycle of a pseudoaphid.
      To follow along save the lifecycle example to a working directory on you computer.
      The simulation **Tutorial_1_0_PseudoAphid_Start** is an empty simulation ready for you to begin
      by the end of this tutorial you should have created the simulation **Tutorial_1_1_PseudoAphid_AgeBasedDevt**

      ### Overview

      The characteristics of the hypothetical species used in this tutorial were suggested by rose aphids and for convenience, the species is referred to as a �Pseudo-aphid� in all further discussions:
      Pseudo-aphids have an adult stage, which they reach 10 days after birth. The adults live for 20 days (i.e. from birth to death is 30 days total). Since the pseudo-aphids are parthenogenetic, all offspring are female and there is no egg stage. The adults begin to produce their 5 progeny after 8 days in the adult stage. The juveniles are produced at a rate which, in a small population, would be equivalent to two births on day 1, four births on day 2, six births on day 3, and so on. The population is free of predators and disease, so all pseudo-aphids only die after 20 days as an adult. Food is assumed to be abundant and has no effect on the population other than to allow it to increase.

      In Tutorial_1_1, ApsimX is set up to simulate an insect population for one year. A lifecycle is established that includes a single Juvenile stage that is transferred to an adult stage after ten days. The adult stage is set up with simple mortality and reproduction functions. In this tutorial, all adults die after twenty days. The reproduction function for adults allows all adults to reproduce at a fixed rate after a fixed time.

      ### Configuring the simulation

      |APSIM Object        | Description         | Values       |
      | :----------------: | :-----------:       |:-----------: |
      | Clock              |                     |              |
      |                    | Start simulation =  | 01/01/2016   |
      |                    | End simulation   =  | 31/12/2016   |
      |                    |                     |              |
      | Weather            |                     |              |
      |                    | Select met file =   |   Normal.met |
      |                    |                     |              |
      | Report             |                     |              |
      |                    | Report Variables  | [Clock].Today   |
      |                    | Report Variables |  [Clock].Today.DayOfYear |
      |                    | Report frequency |  [Clock].DoReport |

      **Adding and building a report**

      Add a report to hold the results of your simulation if there is not one present.

      Steps

      1. Right click FIELD object,
      2. Select **add Model > Report**

      For most simulations, the change in results over time is of interest. To add a time component to your report,

      In the **Report module**  Type "[Clock]." *(be sure to include the full stop after the closing square bracket)*. Options will appear - select "Today" to report today's date.
      Another useful time component to add to your report is the day of the year. To so this in the Report module, Type "[Clock]." *(be sure to include the full stop after the closing square bracket)*. Options will appear - select "Today". and then type another "." full stop. More options will appear and scroll down to "DayOfYear" to report the Julian day.

      To tell the model when to report type clock in the Reporting Requency section and select doReport
      This will do a daily report

      [clock].DoReport

      ### Adding a Lifecycle

      Steps

      1. Go to the FIELD object,
      2. Right click and select **add Model > LifeCycle > LifeCycle**

      The LifeCycle module will be added to your simulation under the Field

      #### Adding a LifeCyclePhase (Juvenile)

      Steps

      1. Right click on the **LifeCycle** object
      2. Select **add Model > LifeCycle > LifeCyclePhase**
      3. Rename the LifeCyclePhase **Juvenile** by clicking on the objects name

      Once the Juvenile LifeCyclePhase has been named its atributes need to be defined. These atributes can be defined by **Functions, Constants or Processes**

      #### Mortality

      AddModel | Function Type | Name | value
      ---------|--------------|------|------
      -|Constant | Mortality  | 0

      Steps

      1. Right click on the **Juvenile** object
      2. Select **add Model > Functions > constant**
      3. Rename constant **Mortlity** set value to **0**

      #### Reproduction
      ---------------------------------------
      AddModel | Function Type | Name | value
      ---------|--------------|------|------
      -|Constant | Mortality  | 0

      Steps

      1. Right click on the **Juvenile** object
      2. Select **add Model > Functions > constant**
      3. Rename constant **Reproduction ** set value to **0**

      #### Development

      ---------------------------------------
      AddModel | Function Type | Name |
      ---------|--------------|------|
      -|MultiplyFunction | Development|

      The pseudo Aphid develops chronologically and after 10 days becomes an Adult

      ---------------------------------------
      AddModel |Function Type | Name |
      ---------|--------------|------|
      -|LinearInterpolationFunction  | TransferToAdult |

      Steps

      1. Right click on the **Development** object
      2. Select **add Model > Functions > LinearInterpolationFunction**
      3. Rename the function **TransferToAdult**

      ---------------------------------------
      AddModel |Function Type | Name | Value|
      ---------|--------------|------|------|
      -|XYPairs  | XYPairs | X =  0, 9.9, 10, 20
      -| | |Y = 0, 0,   1,  1
      -|VariableReference  | XValue | [Juvenile].CurrentCohort.ChronologicalAge

      For the function to work it needs a set of **XYPairs**

      Steps

      1. Right click on the **TransferToAdult** object
      2. Select **add Model > Functions > XYPairs**

      An x value or driving variable is required

      Steps

      1. Right click on the **TransferToAdult** object
      2. Select **add Model > Functions > VariableReference**
      3. Rename the variable **xValue** then specify an internal Plant variable by typing in the value Field.

      The Variable we what is the chronological age of the current cohort for pseudo Aphids

      Steps

      1. Type **[Juvenile].** once you add the **.**
      2. A selection box will pop up select **CurrentCohort**
      3. Add a **.** and select **ChronologicalAge**

      The Step function, which defines the Juvenile to Adult Stage Transfer, requires two
      parameters: the **ChronologicalAge** at which the juveniles become adults and the proportion of juveniles which actually become adults during that time step. These parameters are
      entered as **XYPairs**

      #### Migration
      ---------------------------------------
      Function Type | Name | value
      --------------|------|------
      Constant | Mortality  | 0

      Steps

      1. Right click on the **Juvenile** object
      2. Select **add Model > Functions > constant**
      3. Rename constant **Migration ** set value to **0**

      #### ProgenyDestination
      ---------------------------------------
      LifeCycle Function | Name | Option| Value
      --------------|------|------|------|------
      ProgenyDestinationPhase | ProgenyDestination  | LifeCycle Added | Lifecycle
      - | -  | LifeCyclePhase Added |  |

      The **ProgenyDestinationPhase** describes where progeny go in some cases, such as viruses, the progeny may be part of two lifecycles. In this case they remain in the one lifecycle so the progeny will be added to the current lifecycle

      Steps

      1. select **LifeCycle** from the dropdown list
      2. Since there is no reproduction in this phase the lifecycle phase section is left blank

      **Document your model**

      It is good practice to describe your functions and why you have used them. This can be done by adding a memo field to the function that describes where the data came from and what papers you used

      Steps

      1. Right click on  **TransferToAdult > add Model > Memo**

      Memos can be added as markdown text see Examples Tutorials to see a summary of the markdown features
      or prepare your memos in a markdown specific text editor.

      **__________________________________________________________________________________**

      ### Adding a LifeCyclePhase (Adult)

      Steps

      1. Right click on the **LifeCycle** object
      2. Select **add Model > LifeCycle > LifeCyclePhase**
      3. Rename the LifeCyclePhase **Adult** by clicking on the objects name

      #### Mortality

      As the pseudo-aphids all need to die as adults, a **Mortality** process needs to be set.
      There are three types of Mortality process: **Continuous**, **Establishment** and **Exit**.

      **Continuous mortality** operates throughout the duration of the LifeStage and is the most common type of  mortality.

      However, certain species pass through life cycle stages where considerable  mortality occurs when the organism tries to gain a foothold in its new stage (eg. for ticks  attaching to an animal, a large proportion are rejected during their initial attempts to attach).  Organisms such as this will require an **Establishment Mortality"** process (which acts only  during the move to the new stage) in addition to, or instead of, the Continuous Mortality  process.

      The **Exit mortality** acts only on those individuals that are leaving the LifeStage to  transfer to the next stage.

      The pseudo-aphid requires only the **Continuous mortality** process.  Since  the adults all die at the end of a fixed time period, their mortality-inducing variable is  **Chronological Age**, with the effect being defined by a **Step function**.  The threshold  value (i.e., the age of the adults at death) will be 20 and the constant value will be 1 (i.e, they  all die on the 20th day).  Note that the **Chronological Age** is a measure of the length of time  an individual has stayed within that stage.  The pseudo-aphids are dying at the end of a 30- day life span.  However, since **Phenological Age** in the Adult stage refers only to the  length of time an individual has spent in that stage, 20 days is the correct value of the  parameter.

      AddModel | Function  | Name | Value |
      ---------|--------------|------|------|
      -|AddFunction | Mortality  | |
      -|MultiplyFuncton | Mortality | |
      -|LinearInterpolationFunction|Mortality | |
      -|XYPairs|XYPairs |x= 0, 19.99, 20, 30 |
      -| | | y= 0, 0, 1, 1 |
      -|VariableReference|xValue |[Adult].CurrentCohort.ChronologicalAge |

      Steps

      1. Right click on the **Adult** object
      2. Select **add Model > Functions > AddFunction**
      3. Rename AddFunction to  **Mortality**
      4. Right click on the **Mortlaity** object
      5. Select **add Model > Functions > MultiplyFunction**
      6. Rename AddFunction to  **Mortality**
      7. Right click on the **Mortlity** MultiplyFunction object
      8. Select **add Model > Functions > Variable Reference**
      9. Rename **VariableReference** to  **CohortPopulation**
      10. Right click on the **Mortlity** MultiplyFunction object
      11. Select **add Model > Functions > linearInterpolationFunction**
      12. Rename **linearInterpolationFunction** to  **Mortlity**
      13. Right click on the **Mortlity** linearInterpolationFunction object
      14. Select **add Model > Functions > XYPairs**
      15. Rename **XYPairs** to  **XYPairs**
      16. set xy values in the grid
      17. Right click on the **Mortlity** linearInterpolationFunction object
      18. Select **add Model > Functions > VariableReference**
      19. Rename **VariableReference** to  **XValue**
      20. Set Variable Reference to chronological age

      The step function called **Mortality** tells us what proportion of the population dies on day 20. In this case the step function is either 0 or 1

      This is multiplied by the **CohortPopulation** to tell us how many individuals will die, in this case either none on day 19 (x0) or all of them on day 20 (x1)

      #### Reproduction

      The starting point for setting Reproductive parameters is a **Reproduction** function.

      Three components are requred:

      **Fecundity(E)**,

      **Fecundity(R)**

      **Progeny Production**.

      **<u>Fecundity</u>** is the total number of possible offspring
      that can be produced per individual.  The first two components set this number in slightly
      different ways.  **Fecundity(E) is an establishment process**, acting only when individuals first enter the adult stage.  This is often the most appropriate way to set the fecundity for an insect  i.e., a maximum number of potential offspring (which may depend on how well the insect has fed in the juvenile stages).  We will use Fecundity (E) in this example.

      **<u>Progeny Production</u>** determines the rate at which the progeny are produced over time. Note that the Fecundity does not take into account that half the population consists of males, and normally this will need to be modelled by adjusting the
      value of Fecundity by the sex ratio.

      For the pseudo-aphid model, only the Fecundity(E) process is used, and a constant value of 5 was chosen.  Fecundity will usually vary with environmental factors, but in this model of the pseudo-aphid, Fecundity will not alter.

      **Progeny Production Rate** defines the rate at which the offspring are produced.   For example, some species produce all their progeny at once;
      others produce batches of offspring over short periods of time separated by intervals, while
      others may steadily increase production of offspring over a period of time and then decrease the production rate gradually or rapidly back to zero. The Pseudo-aphid of our example is parthenogenetic (only females are present) and so adjustment of the **Progeny Production** by the sex ratio is not a consideration.

      ![Image name](ProgenyProduction.png)

      While the fractional number of progeny do not apply to an individual pseudo-aphid, they are readily applicable to populations.  An important point to remember is that although the pseudo-aphid's progeny production graph shows that the actual fecundity is exactly equal to the potential fecundity, shown by the area under the curve (shaded), this is in general not so. It is so only because of the deliberately limited nature of this hypothetical organism.  The effects of Mortality invariably reduce the actual fecundity.

      AddModel | Function  | Name | Value |
      ---------|--------------|------|------|
      -|MultiplyFunction | Reproduction  | |
      -|VariableReference | VariableReference |[Adult].CurrentCohort.Population|
      -|MinimumFunction|ProgenyRate | |
      -|LinearAfterThresholdFunction|ProgenyProduction |x property = [Adult].CurrentCohort.ChronologicalAge|
      -| | | x value Trigger = 8 |
      -| | | Gradient = 0.2 |
      -|Constant|Fecundity |5|

      Steps

      1. Right click on the **Adult** object
      2. Select **add Model > Functions > MultiplyFunction**
      3. Rename MultiplyFunction to **Reproduction**
      4. Right click on the **Reproduction** object
      5. Select **add Model > Functions > VariableReference**
      6. Rename VariableReference to **VariableReference** set value to **[Adult].CurrentCohort.Population**
      7. Right click on the **Reproduction** object
      8. Select **add Model > Functions > MinimumFunction**
      9. Rename MinimumFunction to **ProgenyRate**
      10. Right click on the **ProgenyRate** object
      11. Select **add Model > Functions > LinearAfterThresholdFunction**
      12. Rename LinearAfterThresholdFunction to **ProgenyProduction**
      13. Set values to
      14. x Property= **[Adult].CurrentCohort.ChronologicalAge**
      15. x value Trigger= **8**
      16. Gradient= **0.2**
      17. Right click on the **ProgenyProduction** object
      18. Select **add Model > Functions > Constant**
      19. Rename Constant to **Fecundity** set value to **5**

      #### Development

      Development in the adult phase for this model is covered by the reproduction module. this reproduction is a place holder for future work

      AddModel |Function Type | Name | value
      ---------|--------------|------|------|
      -|Constant | Development  | 0    |      |

      Steps

      1. Right click on the **Adult** object
      2. Select **add Model > Functions > constant**
      3. Rename constant **Development ** set value to **0**

      #### Migration

      AddModel |Function Type | Name | value
      ---------|--------------|------|------|
      -|Constant | Mortality  | 0    |      |

      Steps

      1. Right click on the **Juvenile** object
      2. Select **add Model > Functions > constant**
      3. Rename constant **Migration ** set value to **0**

      #### ProgenyDestination

      LifeCycle Function | Name | Option| Value |
      -------------------|------|-------|-------|
      ProgenyDestinationPhase | ProgenyDestination  | LifeCycle Added | Lifecycle |
      -| -  | LifeCyclePhase Added | Juvenile|

      Steps

      1. select **LifeCycle** from the dropdown list
      2. The offspring from the reproductive process will be added to the Juvenile LifecyclePhase

      #### Set Inital Population

      Before we can run the simulation we need an initial population to Start

       Description | Values |
       ------------------------------------------- |------------------------------:|
       Select the type of infestation event | OnStart |
       The name of organisum that infests the zone  | LifeCycle |
       The LifeCyclePhase of the organism when it arrives  | Juvenile |
       Date of infestation (dd-MMM)                  |  |
       Date of infestation (dd-MMM)|                                  |
       Chronological Age of Immigrants (days) | 0 |
       Physiological Age of Immigrants (0-1)        | 0 |

       We have set the inital population physiological age to 0 This is unrealistic, but for inital model development and testing, having the organisims magically appear at age zero makes checking the population dynamics easier. When simulating a population this value should be changed to a more realistic average population developmental age.

       Steps

      1. Right click on the **Field** object and select **infestation**
      2. Rename to **InitialInfestationJuvenile**
      3. Right click on **InitialInfestationJuvenile** object and **add Model > function > Constant**
      4. Rename to **NumberOfImmigrants**
      5. Set value to **1**

      ### Running the Simulation

      To run your simulation, right click on the **Simulation name** and select "**Run APSIM**".

      #### Results

      The results from your simulation will appear in the Report model. If there are no resultes check that you have added a reporting frequency.

      #### Reporting

      Reporting | Reporting variable  |
      :----------:|---------------------|
      1 | [Clock].Today|
      2 | [Clock].Today.DayOfYear|
      3 | [LifeCycle].TotalPopulation|
      4 | [LifeCycle].Juvenile.TotalPopulation|
      4 | [LifeCycle].Adult.TotalPopulation|
      5 | [LifeCycle].Adult.Mortalities |

      Steps

      1. Go to the **Report module** and Type "[LifeCycle]." *(be sure to include the full stop after the closing square bracket)*.
      2. Options will appear - select "Juvenile" and then type another "." full stop.
      3. More options will appear and scroll down to "TotalPopulation" to report the number of individuals within the Juvenile LifeStage (you will end up with **[LifeCycle].Juvenile.TotalPopulation**).

      When examining the results in this simple model you can see how the juvenile population remains constant until it is transferred to the adult population. Then after 8 days the juvenile population starts to increase. If you look at day 30 the inital adult dies.

      looking at the results this way is ok but as we get mor complex it will become more difficult

      #### Ploting Results

      Steps

      1. Right click on the **Field** object and select **add model> Graph**
      2. Rename to **TotalPopulation**
      3. Right click on **TotalPopulation** and **add model> series**
      4. Rename to **TotalPop**
      5. select series and set **Data source** to **Report**
      6. set **x:** to **Clock.Today.DayOfYear**
      7. set **y:** to **LifeCycle.TotalPopulation**
      8. set **Type:** to **scatter**
      9. set **Line Type:** to **Solid**
      10. set **Marker type:** to **None**
      11. repeat steps  5:10 for AdultPopulation, Juvenile population and Adult Mortality
      12. Change the clock date to 28/02/2016 and re run the simulation to see a more dynamic view

      ```

      ```

      Add some additional reporting variables to see the dynamics of cohorts

      | Reporting |
      | :------------------------------------------- |
      | [Clock].Today |
      | [Clock].Today.DayOfYear |
      | [LifeCycle].TotalPopulation |
      | [LifeCycle].Juvenile.TotalPopulation |
      | [LifeCycle].Adult.TotalPopulation |
      | [LifeCycle].Juvenile.CohortCount |
      | [LifeCycle].Adult.CohortCount |
      | [LifeCycle].Juvenile.Populations |
      | [LifeCycle].Juvenile.PhysiologicalAges |
      | [LifeCycle].Adult.Populations |
      | [LifeCycle].Adult.PhysiologicalAges |
      | [LifeCycle].Juvenile.Graduates |
      | [LifeCycle].Adult.Graduates |
      | [LifeCycle].Juvenile.Mortalities |
      | [LifeCycle].Adult.Mortalities |

      end
    Clock: Start=2016-01-01; End=2016-12-31
    Summary SummaryFile
    Weather: FileName=normal.met
    MicroClimate: a_interception=0; b_interception=1; c_interception=0; d_interception=0; soil_albedo=0.3; SoilHeatFluxFraction=0.4; MinimumHeightDiffForNewLayer=0; NightInterceptionFraction=0.5; ReferenceHeight=2
    SoilArbitrator
    Zone Field: Area=1; Slope=0; AspectAngle=0; Altitude=50
      Report: EventNames=[Clock].DoReport
        VariableNames:
          [Clock].Today
          [Clock].Today.DayOfYear
          [LifeCycle].TotalPopulation
          [LifeCycle].Juvenile.TotalPopulation
          [LifeCycle].Adult.TotalPopulation
          [LifeCycle].Adult.Mortalities
      Fertiliser
      Soil: same as Tutorial_1_0_PseudoAphid_Start.Field.Soil
      SurfaceOrganicMatter: InitialResidueName=wheat_stubble; InitialResidueType=wheat; InitialResidueMass=500; InitialStandingFraction=0; InitialCPR=0; InitialCNR=100
      Plant Wheat
      LifeCycle
        LifeCyclePhase Juvenile: Immigrants=0; DevelopmentRate=0; Mortalities=0; Graduates=0; Progeny=0; Emigrants=0
          Constant Mortality: FixedValue=0
          Constant Reproduction: FixedValue=0
          MultiplyFunction Development
            LinearInterpolationFunction TransferToAdult
              XYPairs: X=[0, 9.9, 10, 20]; Y=[0, 0, 1, 1]
              VariableReference XValue: VariableName=[Juvenile].CurrentCohort.ChronologicalAge
          Constant Migration: FixedValue=0
          ProgenyDestinationPhase ProgenyDestination: NameOfLifeCycleForProgeny=LifeCycle
        LifeCyclePhase Adult: Immigrants=0; DevelopmentRate=0; Mortalities=0; Graduates=0; Progeny=0; Emigrants=0
          AddFunction Mortality
            MultiplyFunction Mortality
              VariableReference CohortPopulation: VariableName=[Adult].CurrentCohort.Population
              LinearInterpolationFunction Mortality
                XYPairs: X=[0, 19.99, 20, 30]; Y=[0, 0, 1, 1]
                VariableReference XValue: VariableName=[Adult].CurrentCohort.ChronologicalAge
          MultiplyFunction Reproduction
            VariableReference CohortPopulation: VariableName=[Adult].CurrentCohort.Population
            MinimumFunction ProgenyRate
              LinearAfterThresholdFunction ProgenyProduction: XProperty=[Adult].CurrentCohort.ChronologicalAge; XTrigger=8; Slope=0.2
              Constant Fecundity: FixedValue=5
          Constant Development: FixedValue=0
          Constant Migration: FixedValue=0
          ProgenyDestinationPhase ProgenyDestination: NameOfLifeCycleForProgeny=LifeCycle; NameOfPhaseForProgeny=Juvenile
      Infestation Initial Infestation Juvenile: TypeOfInfestation=0; InfestingOrganisumName=LifeCycle; InfestingPhaseName=Juvenile; ChronoAgeOfImmigrants=0; PhysAgeOfImmigrants=0
        Constant NumberOfImmigrants: FixedValue=1
  Simulation Tutorial_1_2_PseudoAphid_AgeBasedDevtResults
    Memo
      ## Tutorial PseudoAphid Age Based Development Results

      The simulation Tutorial-1-1-PseudoAphid-AgeBasedDevt is the starting point of this tutorial

      ### Examining the output

      **Run APSIM**

      The exponential shape of the growth curves makes identifying what was goin on difficult.

      Change the length of the simulation to see what is happening.

      Set **Clock End Date to 31/3/2016**

      **Run APSIM**

      Often it is easier to look at one piece of data per plot
      Make 3 new plots one to hold **Juvenile** data one to hold **Adult** data and one to hold **Adult.Mortalities**

      Steps

      1. Right click on the **Field** object and select **add model> Graph**
      2. Rename to **AdultPopulation**
      3. Right click on **AdultPopulation** and **add model> series**
      4. Rename to **AdultPop**
      5. select series and set **Data source** to **Report**
      6. set **x:** to **Clock.Today.DayOfYear**
      7. set **y:** to **LifeCycle.Adult.TotalPopulation**
      8. set **Type:** to **scatter**
      9. set **Line Type:** to **Solid**
      10. set **Marker type:** to **None**

      To make the next figure

      Right Click on the AdultPopulation figure and select copy
      write click on the field and select paste
      Change names and Y value to **LifeCycle.Juvenile.TotalPopulation**

      repeat process to make the adult mortality figure

      Right Click on the AdultPopulation figure and select copy
      write click on the field and select paste
      Change names and Y value to **LifeCycle.Adult.Moralities**

      ### View all Graphs together

      Steps

      1. Right click on the **Field** object and select **add model > Folder**
      2. Rename to **Results**
      3. copy and paste each Graph into the Folder
      4. click on the folder to see all Graphs at once
    Clock: Start=2016-01-01; End=2016-03-31
    Weather: FileName=normal.met
    Summary SummaryFile
    SoilArbitrator
    MicroClimate: a_interception=0; b_interception=1; c_interception=0; d_interception=0; soil_albedo=0.3; SoilHeatFluxFraction=0.4; MinimumHeightDiffForNewLayer=0; NightInterceptionFraction=0.5; ReferenceHeight=2
    Zone Field: Area=1; Slope=0; AspectAngle=0; Altitude=50
      Infestation Initial Infestation Juvenile: TypeOfInfestation=0; InfestingOrganisumName=LifeCycle; InfestingPhaseName=Juvenile; ChronoAgeOfImmigrants=0; PhysAgeOfImmigrants=0
        Constant NumberOfImmigrants: FixedValue=1
      Report: EventNames=[Clock].DoReport
        VariableNames:
          [Clock].Today
          [Clock].Today.DayOfYear
          [LifeCycle].TotalPopulation
          [LifeCycle].Juvenile.TotalPopulation
          [LifeCycle].Adult.TotalPopulation
          [LifeCycle].Adult.Mortalities
      Fertiliser
      Soil: same as Tutorial_1_0_PseudoAphid_Start.Field.Soil
      SurfaceOrganicMatter: InitialResidueName=wheat_stubble; InitialResidueType=wheat; InitialResidueMass=500; InitialStandingFraction=0; InitialCPR=0; InitialCNR=100
      Plant Wheat
      LifeCycle
        LifeCyclePhase Juvenile: Immigrants=0; DevelopmentRate=0; Mortalities=0; Graduates=0; Progeny=0; Emigrants=0
          Constant Mortality: FixedValue=0
          Constant Reproduction: FixedValue=0
          MultiplyFunction Development: same as Tutorial_1_1_PseudoAphid_AgeBasedDevt.Field.LifeCycle.Juvenile.Development
          Constant Migration: FixedValue=0
          ProgenyDestinationPhase ProgenyDestination: NameOfLifeCycleForProgeny=LifeCycle
        LifeCyclePhase Adult: Immigrants=0; DevelopmentRate=0; Mortalities=0; Graduates=0; Progeny=0; Emigrants=0
          AddFunction Mortality
            MultiplyFunction Mortalityfunction
              VariableReference CohortPopulation: VariableName=[Adult].CurrentCohort.Population
              LinearInterpolationFunction Mortalityfunction
                XYPairs: X=[0, 19.99, 20, 30]; Y=[0, 0, 1, 1]
                VariableReference XValue: VariableName=[Adult].CurrentCohort.ChronologicalAge
          MultiplyFunction Reproduction: same as Tutorial_1_1_PseudoAphid_AgeBasedDevt.Field.LifeCycle.Adult.Reproduction
          Constant Development: FixedValue=0
          Constant Migration: FixedValue=0
          ProgenyDestinationPhase ProgenyDestination: NameOfLifeCycleForProgeny=LifeCycle; NameOfPhaseForProgeny=Juvenile
  Simulation Tutorial_2_1_PseudoAphid_ConstantMetTempDevt
    Memo
      # Tutorial-PseudoAphid ConstantTempDevt

      The simulation Tutorial-1-2-PseudoAphid-AgeBasedDevtResults is the starting point of this tutorial

      **Chronological and Physiological Age**

      In Tutorial 1_1 and 1_2, the pseudo-aphid model used chronological age to determine the sequence of development and reproduction. Chronological age is unsatisfactory as the only controlling influence on an insect's LifeCycle because the insect's physiological development (and by implication its reproduction and mortality) is often independent of chronological age and is generally controlled to a large extent by temperature. This tutorial presents an example of how APSIM-LifeCycle can model the pseudo-aphid's development from juvenile to adult when the LifeCycle development is based on physiological age and the rate of that development becomes temperature dependent. Since physiological age now enters all further tutorial models, it is defined below:

      Physiological age measures the state of development of an individual with its units generally stated as a proportion (or percentage) of completed development. As an example, the birth of the pseudoaphid could be scaled to 0 and its transition to adult scaled as 1. Since insect development is generally temperature dependent, accumulation of physiological age is usually non- uniform.

      ## The pseudo-aphid and Temperature

      Since the pseudo-aphid's LifeCycle is ‘well known from published papers’, the effects of temperature on development are available and are presented in table form:

      2.1 Pseudo Aphid Life table
      -----------------------------------------------------------
      |Temperature (°C)       | No. of days to developto adult |
      | :----------------: | :--------------------------------:|
      | 10                 |         No Development            |
      | 15                 |              20                   |
      | 20                 |              12                   |
      | 25                 |               8                   |
      | 30                 |               5                   |

      The model used in Tutorial_1_2 remains essentially intact, but the transition from juvenile to adult (currently determined by Chronological Age) now becomes dependent upon Physiological Age, which in turn is dependent upon temperature. All juveniles still become adults when they reach the required Physiological Age. To preserve simplicity of the model, the PseudoAphids are maintained under temperature controlled incubator conditions.

      The results of Table 2-1 can be amended to display rate of development per day. This is done by calculating the reciprocal of the number of days taken to develop to adult (which assumes that the value “1' represents the physiological age of an adult). For example, suppose an organism takes 50 days to develop from egg to adult; its rate of development per day would therefore be 0.02 (ie. 0.02 * 50 = 1). Table 2.2 shows the results for the pseudo-aphid.

      2.2 Pseudo Aphid Life table with rate of development
      --------------------------------------------------------------------------------------------
      |Temperature (°C)       | No. of days to developto adult |Rate of Developmentper day        |
      | :----------------: | :--------------------------------:|:--------------------------------:|
      | 10                 |         No Development            | 0                                |
      | 15                 |              20                   | 0.05                             |
      | 20                 |              12                   | 0.08                             |
      | 25                 |               8                   | 0.125                            |
      | 30                 |               5                   | 0.2                              |

      ![Image name](RateOfDevelopment.png)

      An inspection of Figure 2-1 shows that the development threshold is 10°C, while the slope of the graph is quite close to 0.01. These values will be used for this tutorial.

      ### Simulation set up

      This tutorial requires the following simulation set up.

      This simulation takes place in a controlled temperature lab so the weather file has been changed to remain at a constant 20°C

      ### Clock

      |APSIM Object        | Description         | Values       |
      | :----------------: | :-----------:       |:-----------: |
      | Clock              |                     |              |
      |                    | Start simulation =  | 01/01/2016   |
      |                    | End simulation   =  | 31/12/2016   |
      |                    |                     |              |
      | Weather            |                     |              |
      |                    | Select met file =   |   20°C.met |
      |                    |                     |              |

      ### Modifying Development

      AddModel | Function  | Name | Value |
      ---------|--------------|------|------|
      -|AddFunction|Development  | |
      -|LinearAfterThresholdFunction|DevelopmentRate |x property = [weather].MeanT
      -| | | x value Trigger = 10 |
      -| | | Gradient = 0.01 |

      Steps

      1. Expand **Juvenile** Node
      2. Delete **Development**
      3. Right click on the **Juvenile** object
      4. Select **add Model > Functions > AddFunction**
      5. Rename AddFunction to **Development**
      6. Right click on the **Development** object
      7. Select **add Model > Functions > LinearAfterThresholdFunction**
      8. Rename LinearAfterThresholdFunction to **DevelopmentRate**
      9. Set values to
      10. x Property= **[weather].MeanT**
      11. x value Trigger= **10**
      12. Gradient= **0.01**
      13. Select **Development** and use control up Arrow to move it above **Reproduction**

      *Run APSIM*
    Clock: Start=2016-01-01; End=2016-12-31
    Weather: FileName=20degrees.met
    Summary SummaryFile
    SoilArbitrator
    MicroClimate: a_interception=0; b_interception=1; c_interception=0; d_interception=0; soil_albedo=0.3; SoilHeatFluxFraction=0.4; MinimumHeightDiffForNewLayer=0; NightInterceptionFraction=0.5; ReferenceHeight=2
    Zone Field: Area=1; Slope=0; AspectAngle=0; Altitude=50
      Report: EventNames=[Clock].DoReport
        VariableNames:
          [Clock].Today
          [Clock].Today.DayOfYear
          [LifeCycle].TotalPopulation
          [LifeCycle].Juvenile.TotalPopulation
          [LifeCycle].Adult.TotalPopulation
          [LifeCycle].Adult.Mortalities
      Fertiliser
      Soil: same as Tutorial_1_0_PseudoAphid_Start.Field.Soil
      SurfaceOrganicMatter: InitialResidueName=wheat_stubble; InitialResidueType=wheat; InitialResidueMass=500; InitialStandingFraction=0; InitialCPR=0; InitialCNR=100
      Plant Wheat
      LifeCycle
        LifeCyclePhase Juvenile: Immigrants=0; DevelopmentRate=0; Mortalities=0; Graduates=0; Progeny=0; Emigrants=0
          AddFunction Development
            LinearAfterThresholdFunction DevelopmentRate: XProperty=[weather].MeanT; XTrigger=10; Slope=0.01
          Constant Mortality: FixedValue=0
          Constant Reproduction: FixedValue=0
          Constant Migration: FixedValue=0
          ProgenyDestinationPhase ProgenyDestination: NameOfLifeCycleForProgeny=LifeCycle
        LifeCyclePhase Adult: same as Tutorial_1_1_PseudoAphid_AgeBasedDevt.Field.LifeCycle.Adult
      Infestation Initial Infestation Juvenile: TypeOfInfestation=0; InfestingOrganisumName=LifeCycle; InfestingPhaseName=Juvenile; ChronoAgeOfImmigrants=0; PhysAgeOfImmigrants=0
        Constant NumberOfImmigrants: FixedValue=1
  Simulation Tutorial_2_2_PseudoAphid_ConstantTempDevt
    Memo
      ## Tutorial-PseudoAphid_ConstantTempDevt

      The simulation Tutorial-2-1-PseudoAphid_ConstantMetTempDevt is the starting point of this tutorial

      The phenology of diseases, pathogens and insects respond to temperature and much of the research is conducted in controlled temperature incubators and so the ability to simulate a constant temperature is important. Changing the Weather file is one way to do this, however an alternative simpler way is to add a constant **Incubation temperature**.

      ### Simulation set up

      Return the clock and met file to what they were in tutorial 1.2

      |APSIM Object        | Description         | Values       |
      | :----------------: | :-----------:       |:-----------: |
      | Clock              |                     |              |
      |                    | Start simulation =  | 01/01/2016   |
      |                    | End simulation   =  | 31/12/2016   |
      |                    |                     |              |
      | Weather            |                     |              |
      |                    | Select met file =   |   Normal.met |
      |                    |                     |              |

      Steps

      1. Right click on **Your simulations name ie Tutorial_2_2**
      2. Select **add Model > Functions > constant**
      3. Rename AddFunction to **IncubatorTemp**
      4. Use **control** and up arrow to position it below **Weather**

      ### Modify Development

      *Modifying the model to set Juvenile development in response to constant incubator temperature*

      Steps

      In the LifeCycle, expand **Juvenile > Development > DevelopmentRate.**
      Set **DevelopmentRate** function set:
      Xproperty to [IncubatorTemp]
      X value trigger to 10
      Gradient to 0.01

      *Run APSIM*
    Clock: Start=2016-01-01; End=2016-12-31
    Summary SummaryFile
    Weather: FileName=normal.met
    Constant IncubatorTemp: FixedValue=15
    SoilArbitrator
    MicroClimate: a_interception=0; b_interception=1; c_interception=0; d_interception=0; soil_albedo=0.3; SoilHeatFluxFraction=0.4; MinimumHeightDiffForNewLayer=0; NightInterceptionFraction=0.5; ReferenceHeight=2
    Zone Field: Area=1; Slope=0; AspectAngle=0; Altitude=50
      Report: EventNames=[Clock].DoReport
        VariableNames:
          [Clock].Today
          [Clock].Today.DayOfYear
          [LifeCycle].TotalPopulation
          [LifeCycle].Juvenile.TotalPopulation
          [LifeCycle].Adult.TotalPopulation
          [LifeCycle].Adult.Mortalities
          [DevelopmentRate]
          [LifeCycle].Juvenile.PhysiologicalAges[1]
      Fertiliser
      Soil: same as Tutorial_1_0_PseudoAphid_Start.Field.Soil
      SurfaceOrganicMatter: InitialResidueName=wheat_stubble; InitialResidueType=wheat; InitialResidueMass=500; InitialStandingFraction=0; InitialCPR=0; InitialCNR=100
      Plant Wheat
      LifeCycle
        LifeCyclePhase Juvenile: Immigrants=0; DevelopmentRate=0; Mortalities=0; Graduates=0; Progeny=0; Emigrants=0
          AddFunction Development
            LinearAfterThresholdFunction DevelopmentRate: XProperty=[IncubatorTemp]; XTrigger=10; Slope=0.01
          Constant Mortality: FixedValue=0
          Constant Reproduction: FixedValue=0
          Constant Migration: FixedValue=0
          ProgenyDestinationPhase ProgenyDestination: NameOfLifeCycleForProgeny=LifeCycle
        LifeCyclePhase Adult: same as Tutorial_1_2_PseudoAphid_AgeBasedDevtResults.Field.LifeCycle.Adult
      Infestation Initial Infestation Juvenile: TypeOfInfestation=0; InfestingOrganisumName=LifeCycle; InfestingPhaseName=Juvenile; ChronoAgeOfImmigrants=0; PhysAgeOfImmigrants=0
        Constant NumberOfImmigrants: FixedValue=1
  Simulation Tutorial_2_3_PseudoAphid_MeanFieldTempDevt
    Memo
      ## Tutorial-PseudoAphid_ConstantTempDevt MeanDailyTemp

      The simulation Tutorial-2-2-PseudoAphid_ConstantTempDevt is the starting point of this tutorial

      ### Simulation set up

      Return the clock and met file to what they were in tutorial 1.2

      |APSIM Object        | Description         | Values       |
      | :----------------: | :-----------:       |:-----------: |
      | Clock              |                     |              |
      |                    | Start simulation =  | 01/01/2016   |
      |                    | End simulation   =  | 31/12/2016   |
      |                    |                     |              |
      | Weather            |                     |              |
      |                    | Select met file =   |   Normal.met |
      |                    |                     |              |

      Steps

      Delete The **IncubatorTemp** object or right click on the **IncubatorTemp** and unselect the **Enable** check box

      ### Modify Development

      now change the driving variable for temp development

      Steps

      In the LifeCycle, expand **Juvenile > Development > DevelopmentRate.**
      Set **DevelopmentRate** function set:
      Xproperty to [weather].MeanT
      X value trigger to 10
      Gradient to 0.01
    Clock: Start=2016-01-01; End=2016-12-31
    Weather: FileName=normal.met
    Summary SummaryFile
    SoilArbitrator
    MicroClimate: a_interception=0; b_interception=1; c_interception=0; d_interception=0; soil_albedo=0.3; SoilHeatFluxFraction=0.4; MinimumHeightDiffForNewLayer=0; NightInterceptionFraction=0.5; ReferenceHeight=2
    Zone Field: Area=1; Slope=0; AspectAngle=0; Altitude=50
      Report: EventNames=[Clock].DoReport
        VariableNames:
          [Clock].Today
          [Clock].Today.DayOfYear
          [LifeCycle].TotalPopulation
          [LifeCycle].Juvenile.TotalPopulation
          [LifeCycle].Adult.TotalPopulation
          [LifeCycle].Adult.Mortalities
      Fertiliser
      Soil: same as Tutorial_1_0_PseudoAphid_Start.Field.Soil
      SurfaceOrganicMatter: InitialResidueName=wheat_stubble; InitialResidueType=wheat; InitialResidueMass=500; InitialStandingFraction=0; InitialCPR=0; InitialCNR=100
      Plant Wheat
      LifeCycle
        LifeCyclePhase Juvenile: same as Tutorial_2_1_PseudoAphid_ConstantMetTempDevt.Field.LifeCycle.Juvenile
        LifeCyclePhase Adult: same as Tutorial_1_2_PseudoAphid_AgeBasedDevtResults.Field.LifeCycle.Adult
      Infestation Initial Infestation Juvenile: TypeOfInfestation=0; InfestingOrganisumName=LifeCycle; InfestingPhaseName=Juvenile; ChronoAgeOfImmigrants=0; PhysAgeOfImmigrants=0
        Constant NumberOfImmigrants: FixedValue=1
  Simulation Tutorial_3_1_PseudoAphid_DegreeDayDevt
    Memo
      # Tutorial_PseudoAphid Temperature Based Development Day Degrees

      The simulation Tutorial-2-3-PseudoAphid_MeanFieldTempDevt is the starting point of this tutorial

      ## Degree Days

      ### Introduction

      In the Tutorial_2_3, development of the PseudoAphid was linked to temperatures, with actual field temperatures used as input. An average temperature was calculated from the daily minimum and maximum, and this was applied to the development process to drive the increase in Physiological Age. This approach is unsatisfactory in that it does not fully reflect the actual conditions the organisms experienced in the field. A simple example will make this clear: Minimum and maximum temperature values of 8°C and 12°C give an average temperature of 10°C, but so do 0°C and 20°. In the model of Tutorial 2, both these would give the same increase in development, yet to the insect in the field, they are likely to have quite different effects. The later temperature regime would result in a substantial part of the day well above the developmental threshold of 10°C, and is likely to result in more development than the former regime. This concept (termed the ‘day-degree’ concept) is described and applied to the model in this tutorial.

      ### The ‘Degree Day’ Concept

      The pseudo-aphid has been given a development threshold of 10°C, which implies that once the temperature rises above that threshold, development proceeds. Suppose that the pseudo-aphid was existing under ideal conditions in an incubator, where the temperature was maintained at a steady 23°C. This situation is illustrated in Figure 3.1, where the area between the developmental threshold and the actual temperature is shaded. The shaded area represents the number of ‘degree-days’ available to the aphid’s development. The name ‘degree-days’ is derived from the fact that the size of the area is obtained by multiplying the height of the shaded rectangle (in degrees) by the width (a number of days). Each day has a temperature that is 13°C above the threshold of 10°C, thus the number of degree days accumulated over a 3-day period would be 13 x 3 = 39.
      ![Image name](Figure3_1.png)
      #### Figure **Accumulation of “Day-degrees” at a constant temperature**

      Suppose now that the temperature is different each day, but constant within the day. Three successive days, with temperatures of 15°C, 6°and 12°C are shown in Figure 4.2. Again, the number of degree-days that have accumulated is calculated by summing the area under the temperature curve (and above the threshold temperature line). In this case, it is 5 + 0 + 2 = 7 degree days. The temperature on the second day is below the developmental threshold, and its contribution to the sum is zero. Note that the average temperature for the three days is 11°C, which would yield only 3 degree-days over the 3 days if it were applied directly.

      ![Image name](Figure3_2.png)
      #### Figure **Accumulation at day-degrees at different temperatures**

      An important point to note is that determining accumulated degree-days in this way is exactly equivalent to specifying development in terms of “Physiological Age”, with “Physiological Age” a function of temperature using the “Linear above Threshold” function. This is easily seen by comparing Figure 4.2 with the graph below (Figure 4.3), where the slope of the function is set to 1.

      ![Image name](Figure3_3.png)
      #### Figure 4.3 Daily increment in Physiological Age with “Linear above Threshold” function**

      ### Calculating Degree Days Using the Circadian Cycle

      When using actual field temperatures, the situation is more complex, as the temperature varies between the day’s minimum and maximum in some cyclical way each day. APSIM uses the daily maximum and minimum temperatures of the meteorological database to fix the “crest” and “trough” limits of a sinusoidal, circadian cycle of temperatures (Figure 4). To calculate the number of degree- days, the same procedure as in the above examples is used. The sine curve is divided into 8 segments (each of 3 hours). A rectangle (of width 3 hours) is created for each of the 8 segments, with the base on the threshold temperature and the midpoint of its top edge on the sine curve (Figure 4). The area of this rectangle is used as the degree-days accumulated for those 3 hours, and all 8 areas are added to obtain the total degree-days for the whole day. The sinusoidal approximation should be adequate for most purposes that APSIM-LifeCycle is used for, and will be used for the Pseudo-aphid model.
        ![Image name](Figure3_4.png)
      ##### Figure 4.4. Circadian cycle between daily maximum and minimum temperatures, and the 3-hourly degree-day summation

      The current Pseudo-aphid model already implicitly uses degree-days for determining development (since the “Linear above Threshold” function is used to determine the accumulation of Physiological Age). The model will now be modified so that a circadian curve of temperature is used for driving the development.

      #### Simulation set up

      Return the clock and met file to what they were in tutorial 1.2

      |APSIM Object        | Description         | Values       |
      | :----------------: | :-----------:       |:-----------: |
      | Clock              |                     |              |
      |                    | Start simulation =  | 01/01/2016   |
      |                    | End simulation   =  | 31/12/2016   |
      |                    |                     |              |
      | Weather            |                     |              |
      |                    | Select met file =   |   Normal.met |
      |                    |                     |              |

      ### Add a function to calculate day degrees for development

      Many models in APSIM use thermal time to describe different processes. There a number of ways to convert max and minimum temperature to sub daily temperatures. In this example we will use houly temperature to calculate our average temperature In many other APSIM models 3-hourly temperatures are used.

      #### Add an HourlyInterpolation Function

      The Thermal time function will be added to the lifecycle node so all life stages can easily use it

      Steps

      1. Right click on **LifeCycle**
      2. Select **add Model > Functions > HourlyInterpolation**
      3. Rename HourlyInterpolation to **ThermalTime**
      4. Use **control** and up arrow to position it above juvenile
      5. set method used to agregate sub daily temperature function to **average**

      This function will interpolate the information that comes to it from variables below it and will either sum or average these values
      for this example set the thermalTime to **Average**

      #### Add an interpolationMethod

      Different interpolation methods exist within APSIM the **HourlySinPpAdjusted** method:

       calculating the hourly temperature based on Tmax, Tmin and daylength
       At sunrise (th = 12 − d/2), the air temperature equals Tmin. The maximum temperature
       is reached when th equals 12 + p h solar time.The default value for p is 1.5 h.
       The sinusoidal curve is followed until sunset. Then a transition takes place to an
       exponential decrease, proceeding to the minimum temperature of the next day. To
       plot this curve correctly, we first need the starting point, the temperature at sunset
       (Tsset).
      or the ThreehourSin method commonly used in APSIM classic models and based on the work of Jones, C.A., Kiniry, J.R., 1986. A Simulation Model of Maize Growth and Development.
      Texas A&M University Press, College Station. https://doi.org/10.1046/j.1469-
      8137.2003.00717.x/full.

      For this model we will use the hourly interpolation method

      Steps

      1. Right click on **ThermalTime**
      2. Select **add Model > Functions > HourlySinPpAdjusted**
      3. Rename HourlySinPpAdjusted to **interpolationMethod**

      #### Add a Response variable

      The Response variable is required to drive the interpolation function in this case it will be treated as a direct response, but it can also be used to define base and maximum temperaures but for this example our thermal times calculations will include all temperatures

      Steps

      1. Right click on **ThermalTime**
      2. Select **add Model > Functions > XYPairs**
      3. Rename XYPairs to **Response**
      4. Set XYPairs

      AddModel | Function  | Name | Value |
      ---------|--------------|------|------|
      -|XYPairs|XYPairs |x= 0, 20, 50, 100 |
      -| | | y= 0, 20, 50, 100 |

      5. Use **control** and **up arrow** to position **Response** above the **InterpolationMethod**

      ### Set Development Rate

      Change the Development rate to use thermal time

      Steps

      In the LifeCycle, expand **Juvenile > Development > DevelopmentRate.**
      Set **DevelopmentRate** function set:
      Xproperty to [ThermalTime]
      X value trigger to 10
      Gradient to 0.01
    Clock: Start=2016-01-01; End=2016-12-31
    Weather: FileName=normal.met
    Summary SummaryFile
    MicroClimate: a_interception=0; b_interception=1; c_interception=0; d_interception=0; soil_albedo=0.3; SoilHeatFluxFraction=0.4; MinimumHeightDiffForNewLayer=0; NightInterceptionFraction=0.5; ReferenceHeight=2
    SoilArbitrator
    Zone Field: Area=1; Slope=0; AspectAngle=0; Altitude=50
      Report: EventNames=[Clock].DoReport
        VariableNames:
          [Clock].Today
          [Clock].Today.DayOfYear
          [LifeCycle].TotalPopulation
          [LifeCycle].Juvenile.TotalPopulation
          [LifeCycle].Adult.TotalPopulation
          [LifeCycle].Adult.Mortalities
          [weather].MeanT
          [ThermalTime]
      Fertiliser
      Soil: same as Tutorial_1_0_PseudoAphid_Start.Field.Soil
      SurfaceOrganicMatter: InitialResidueName=wheat_stubble; InitialResidueType=wheat; InitialResidueMass=500; InitialStandingFraction=0; InitialCPR=0; InitialCNR=100
      Plant Wheat
      LifeCycle
        HourlyInterpolation ThermalTime: agregationMethod=0
          XYPairs Response: X=[0, 20, 50, 100]; Y=[0, 20, 50, 100]
          HourlySinPpAdjusted InterpolationMethod
        LifeCyclePhase Juvenile: Immigrants=0; DevelopmentRate=0; Mortalities=0; Graduates=0; Progeny=0; Emigrants=0
          AddFunction Development
            LinearAfterThresholdFunction DevelopmentRate: XProperty=[Weather].MeanT; XTrigger=10; Slope=0.01
          Constant Mortality: FixedValue=0
          Constant Reproduction: FixedValue=0
          Constant Migration: FixedValue=0
          ProgenyDestinationPhase ProgenyDestination: NameOfLifeCycleForProgeny=LifeCycle
        LifeCyclePhase Adult: same as Tutorial_1_1_PseudoAphid_AgeBasedDevt.Field.LifeCycle.Adult
      Infestation Initial Infestation Juvenile: TypeOfInfestation=0; InfestingOrganisumName=LifeCycle; InfestingPhaseName=Juvenile; ChronoAgeOfImmigrants=0; PhysAgeOfImmigrants=0
        Constant NumberOfImmigrants: FixedValue=1
  Simulation Tutorial_4_1_PseudoAphid_HourlyDevt
    Memo
      # Tutorial_PseudoAphid Development Using hourly Development

       Tutorial-3-1-PseudoAphid_DegreeDayDevt is the starting point of this tutorial

      ## Modifying the Model to simulate development in response to hourly temperatures

      ### Simulation set up

      Return the clock and met file to what they were in tutorial 1.2

      |APSIM Object        | Description         | Values       |
      | :----------------: | :-----------:       |:-----------: |
      | Clock              |                     |              |
      |                    | Start simulation =  | 01/01/2016   |
      |                    | End simulation   =  | 31/12/2016   |
      |                    |                     |              |
      | Weather            |                     |              |
      |                    | Select met file =   |   Normal.met |
      |                    |                     |              |

      In this Tutorial we will add hourly development to the Juvenile development stage. To start we will remove the existing development process and then convert the thermal time process to control development

      ### Modifying Juvenile Development

      Steps

      Right click on **DevelopmentRate**  it is under **Juvenile > Development**
      Select **Delete**
      Right click on **ThermalTime** Copy and paste onto **Develppment**
      rename ThermalTime to **ThermalTimeDevelopment**
       **Delete** **ThermalTime**

      If we re-examine the Life tables we see an additional temperature the 34°C tempereature that stops development This is more realistic as most organisims will have an optimum range of temperatures for development. This envelope of temperature is often described as the cardinal temperatures for development. if we include this envelope below the hourly Interpoloation function only temperatures within the envelope will be used to calculate thermal time and development.

      Pseudo Aphid Life table with rate of development
      --------------------------------------------------------------------------------------------
      |Temperature (°C)       | No. of days to developto adult |Rate of Developmentper day        |
      | :----------------: | :--------------------------------:|:--------------------------------:|
      | 10                 |         No Development            | 0                                |
      | 15                 |              20                   | 0.05                             |
      | 20                 |              12                   | 0.08                             |
      | 25                 |               8                   | 0.125                            |
      | 30                 |               5                   | 0.2                              |
      | 34                 |         No Development            | 0                                |

      Based on our knowledge of the pseudo aphid we can now construct the cardinal temperatures for development within the XYPairs of the **Response**

      Response values
      ------------------------------------
      |         X          |        Y     |
      | :----------------: | :-----------:|
      |         0          |         0    |
      |         10         |         0    |
      |         20         |         0.1  |
      |         30         |         0.2  |
      |         34         |         0    |

      *Run APSIM*
    Clock: Start=2016-01-01; End=2016-12-31
    Weather: FileName=normal.met
    Summary SummaryFile
    MicroClimate: a_interception=0; b_interception=1; c_interception=0; d_interception=0; soil_albedo=0.3; SoilHeatFluxFraction=0.4; MinimumHeightDiffForNewLayer=0; NightInterceptionFraction=0.5; ReferenceHeight=2
    SoilArbitrator
    Zone Field: Area=1; Slope=0; AspectAngle=0; Altitude=50
      Report: EventNames=[Clock].DoReport
        VariableNames:
          [Clock].Today
          [Clock].Today.DayOfYear
          [LifeCycle].TotalPopulation
          [LifeCycle].Juvenile.TotalPopulation
          [LifeCycle].Adult.TotalPopulation
          [LifeCycle].Adult.Mortalities
          [weather].MeanT
          [ThermalTime]
      Fertiliser
      Soil: same as Tutorial_1_0_PseudoAphid_Start.Field.Soil
      SurfaceOrganicMatter: InitialResidueName=wheat_stubble; InitialResidueType=wheat; InitialResidueMass=500; InitialStandingFraction=0; InitialCPR=0; InitialCNR=100
      Plant Wheat
      LifeCycle
        LifeCyclePhase Juvenile: Immigrants=0; DevelopmentRate=0; Mortalities=0; Graduates=0; Progeny=0; Emigrants=0
          AddFunction Development
            HourlyInterpolation ThermalTimeDevelopment: agregationMethod=0
              HourlySinPpAdjusted InterpolationMethod
              XYPairs Response: X=[0, 10, 20, 30, 34]; Y=[0, 0, 0.1, 0.2, 0]
          Constant Mortality: FixedValue=0
          Constant Reproduction: FixedValue=0
          Constant Migration: FixedValue=0
          ProgenyDestinationPhase ProgenyDestination: NameOfLifeCycleForProgeny=LifeCycle
        LifeCyclePhase Adult: same as Tutorial_1_1_PseudoAphid_AgeBasedDevt.Field.LifeCycle.Adult
      Infestation Initial Infestation Juvenile: TypeOfInfestation=0; InfestingOrganisumName=LifeCycle; InfestingPhaseName=Juvenile; ChronoAgeOfImmigrants=0; PhysAgeOfImmigrants=0
        Constant NumberOfImmigrants: FixedValue=1
  Simulation Tutorial_5_1_PseudoAphid_TempDepMortality
    Memo
      # Tutorial_PseudoAphid_Temperature Dependent Mortality

       Tutorial-4-1-PseudoAphid_3hrlyDevt is the starting point of this tutorial

      ## Introduction

      In the current pseudo-aphid model, the only source of mortality is in the Adult stage, where adults die of “old age” (i.e., after they reach a specified Chronological Age). Mortality can be built into each lifestage and mortality can be linked to any suitable user-selected variable(s). In the field, aphids suffer mortality for a variety of reasons, predators, humidity, disease, temperature, etc. and all of these can be modelled. In this tutorial, temperature-driven mortality will be added to the pseudo-aphid model. Aphids are affected adversely by both excessively high and low temperatures. It will be assumed that each lifestage of the pseudo-aphid suffers a linear mortality in response to unfavourably high/low temperatures and that this will be the only additional cause of mortality apart from the currently existing adult death due to age.

      ## Temperature-based Mortality

      Assume that both the juveniles and adults have the same sensitivity to extremes of cold and heat. Further assume that we have data that indicates that mortality starts to occur when temperatures drop below 4°C and increases by 0.1 for each degree temperature drop below that value (i.e., at 3°C, there is 10% mortality per timestep, at 2°C, there is 20%, etc). The data also shows that mortality occurs above 34°C, and increase by 0.05 for every degree above that temperature (so that, for example, 20% of individuals die each timestep at 38°C due to heat stress). These responses will now be incorporated into the model.

      Low temperature Mortality
      ------------------------------------
      |         X          |        Y     |
      | :----------------: | :-----------:|
      |        -6          |         1    |
      |        -4          |         0.8  |
      |        -2          |         0.6  |
      |         0          |         0.4  |
      |         1          |          0.3 |
      |         2          |          0.2 |
      |         3          |          0.1 |
      |         4          |          0   |

      High temperature Mortality
      ------------------------------------
      |         X          |        Y     |
      | :----------------: | :-----------:|
      |         34         |        0     |
      |         38         |        0.2   |
      |         42         |        0.4   |
      |         46         |        0.6   |
      |         50         |        0.8   |
      |         54         |        1     |

      ## Juvenile Temperature Based Mortality

      Steps

      1. **Delete** Juvenile **Mortality** constant
      2. Add an **AddFunction** to **juvenile** rename **Mortlity**
      3. Add a **MultiplyFunction** to **Mortality** rename **LowTempMortlaity**
      4. Add a **VariableReference** to **LowTempMortlaity** rename **CohortPopulation**
      5. Add a **LinearInterpolationFunction** to **LowTempMortlaity** rename **LowTempMortlaity**
      6. Add a **XYPairs** to LinearInterpolationFunction **LowTempMortlaity**
      7. Add a **VariableReference** to LinearInterpolationFunction **LowTempMortlaity** rename **XVariable**
      8. Set **XVariable** to [weather].MinT
      9. set **XYPairs** to Low temp Mortality table
      10. set CohortPopulation to [Juvenile].CurrentCohort.Population

      Repeat for High temp mortality

      1. Add a **MultiplyFunction** to **Mortlity** rename **HighTempMortlaity**
      2. Add a **VariableReference** to **HighTempMortlaity** rename **CohortPopulation**
      3. Add a **LinearInterpolationFunction** to **HighTempMortlaity** rename **HighTempMortlaity**
      4. Add a **XYPairs** to LinearInterpolationFunction **HighTempMortlaity**
      5. Add a **VariableReference** to LinearInterpolationFunction **HighTempMortlaity** rename **XVariable**
      6. Set **XVariable** to [weather].MaxT
      7. set **XYPairs** to High temp Mortality table
      8. set CohortPopulation to [Juvenile].CurrentCohort.Population

      ## Adult Temperature Based Mortality

      The pseudo Aphid sensetivity to temperature is the same in the adult stage as the Juvenile stage.
      The adult stage already has agebased mortality that kills the population after 20 days as an adult to include temperature based mortality add the lowTempMortality (multiplyFunction) to the adult Mortlity (addFunction)

      Steps

      1. Right click on **LowTempMortlity** in the **Juvenile** LifePhase **copy**
      2. Right Click on **Mortality** (AddFunction) **Adult** LifePhase and **paste**
      3. Repeat for High temp.

      ## Results

      add a new result output Juvenile mortality
      add a new graph to the results folder
      see tutorial 1.2 for help
    Clock: Start=2016-01-01; End=2016-12-31
    Summary SummaryFile
    Weather: FileName=normal.met
    SoilArbitrator
    MicroClimate: a_interception=0; b_interception=1; c_interception=0; d_interception=0; soil_albedo=0.3; SoilHeatFluxFraction=0.4; MinimumHeightDiffForNewLayer=0; NightInterceptionFraction=0.5; ReferenceHeight=2
    Zone Field: Area=1; Slope=0; AspectAngle=0; Altitude=50
      Report: EventNames=[Clock].DoReport
        VariableNames:
          [Clock].Today
          [Clock].Today.DayOfYear
          [LifeCycle].TotalPopulation
          [LifeCycle].Juvenile.TotalPopulation
          [LifeCycle].Adult.TotalPopulation
          [LifeCycle].Adult.Mortalities
          [LifeCycle].Juvenile.Mortalities
      Fertiliser
      Soil: same as Tutorial_1_0_PseudoAphid_Start.Field.Soil
      SurfaceOrganicMatter: InitialResidueName=wheat_stubble; InitialResidueType=wheat; InitialResidueMass=500; InitialStandingFraction=0; InitialCPR=0; InitialCNR=100
      Plant Wheat
      LifeCycle
        LifeCyclePhase Juvenile: Immigrants=0; DevelopmentRate=0; Mortalities=0; Graduates=0; Progeny=0; Emigrants=0
          AddFunction Development
            HourlyInterpolation ThermalTimeDevelopment: agregationMethod=0
              XYPairs Response: X=[0.1, 10, 20, 30, 34]; Y=[0, 0, 0.1, 0.2, 0]
              ThreeHourSin InterpolationMethod
          AddFunction Mortality
            MultiplyFunction LowTempMortality
              VariableReference CohortPopulation: VariableName=[Juvenile].CurrentCohort.Population
              LinearInterpolationFunction LowTempMortality
                XYPairs: X=[-6, -4, -2, 0, 1, 2, 3, 4]; Y=[1, 0.8, 0.6, 0.4, 0.3, 0.2, 0.1, 0]
                VariableReference XValue: VariableName=[Weather].MinT
            MultiplyFunction HighTempMortality
              VariableReference CohortPopulation: VariableName=[Juvenile].CurrentCohort.Population
              LinearInterpolationFunction HighTempMortality
                XYPairs: X=[34, 38, 42, 46, 50, 54]; Y=[0, 0.2, 0.4, 0.6, 0.8, 1]
                VariableReference XValue: VariableName=[Weather].MaxT
          Constant Reproduction: FixedValue=0
          Constant Migration: FixedValue=0
          ProgenyDestinationPhase ProgenyDestination: NameOfLifeCycleForProgeny=LifeCycle
        LifeCyclePhase Adult: Immigrants=0; DevelopmentRate=0; Mortalities=0; Graduates=0; Progeny=0; Emigrants=0
          AddFunction Mortality
            MultiplyFunction Mortality: same as Tutorial_1_1_PseudoAphid_AgeBasedDevt.Field.LifeCycle.Adult.Mortality.Mortality
            MultiplyFunction LowTempMortality
              VariableReference CohortPopulation: VariableName=[Adult].CurrentCohort.Population
              LinearInterpolationFunction LowTempMortality
                XYPairs: X=[-6, -4, -2, 0, 1, 2, 3, 4]; Y=[1, 0.8, 0.6, 0.4, 0.3, 0.2, 0.1, 0]
                VariableReference XValue: VariableName=[Weather].MinT
            MultiplyFunction HighTempMortality
              VariableReference CohortPopulation: VariableName=[Adult].CurrentCohort.Population
              LinearInterpolationFunction HighTempMortality
                XYPairs: X=[34, 38, 42, 46, 50, 54]; Y=[0, 0.2, 0.4, 0.6, 0.8, 1]
                VariableReference XValue: VariableName=[Weather].MaxT
          MultiplyFunction Reproduction: same as Tutorial_1_1_PseudoAphid_AgeBasedDevt.Field.LifeCycle.Adult.Reproduction
          Constant Development: FixedValue=0
          Constant Migration: FixedValue=0
          ProgenyDestinationPhase ProgenyDestination: NameOfLifeCycleForProgeny=LifeCycle; NameOfPhaseForProgeny=Juvenile
      Infestation Initial Infestation Juvenile: TypeOfInfestation=0; InfestingOrganisumName=LifeCycle; InfestingPhaseName=Juvenile; ChronoAgeOfImmigrants=0; PhysAgeOfImmigrants=0
        Constant NumberOfImmigrants: FixedValue=1
  Simulation Tutorial_6_1_PseudoAphid_DensityDepMortality
    Memo
      # Tutorial_PseudoAphid Mortality (density-dependent)

       Tutorial-5-1-PseudoAphidMortality (TempDepMort) is the starting point of this tutorial

      ## Introduction

      Two variables have so far been used to control the pseudo-aphid’s mortality: Chronological Age in the adults and temperature in both stages. In Tutorial 5, the effect of these mortality factors was explored. It was evident that population stability was not achieved – populations either increasing forever in suitable locations or becoming extinct in unfavourable locations. Much of this is due to the fact that an isolated population is being modelled and in fact populations will often die out in the field, to be re-established by immigrants later. However, many factors that cause mortality in populations are linked in some way to the density of the population, generally increasing the proportional mortality as the population density increases. These mortality factors (termed density-dependent) do help stabilize isolated populations.

      ## Population Density and Mortality

      Population density is measured as the number of individuals per unit area. If for a simple case, the living area available for the population was fixed (eg. the number of pseudo-aphids present in a lucerne crop), population density would simply be a reflection of total population. This tutorial will assume such a situation so that an increase in population will automatically mean an increase in population density. Exactly how an increase in population density affects the population growth rate depends on the individual species’ characteristics, but there are generally a few main causes of increased mortality rates in a larger population: crowding, food depletion, predation by attracted predators and increase of disease through rapid transmission of pathogens. Density dependent mortality is a stabilising influence on a population because it has a negative feedback effect. Put simply, the more the population grows, the greater will the rate of mortality become and the ensuing deaths will therefore reduce the population growth rate. As the population decreases, the mortality rate decreases also and the population growth rate increases once more. The population therefore tends to be cyclical with numbers sometimes exceeding the ability of the environment to sustain it but never quite falling away to extinction.

      This is an area of modelling where data is often absent, or if available, difficult to interpret. It is usually evident that a population is fluctuating between some limits, but the causes are usually due to many factors and difficult to establish experimentally. When modelling the population, it may be necessary to lump many into one single mortality function, and “guess” at the function shape and parameter values, so that the “model” population predicts the known field population. In that way, the model forms a hypothesis, which will stand or fall when tested with further data. As with all hypotheses, the model will lead to a more directed data collection effort and thus a better utilization of available resources. The improvement in understanding may then allow the previous, composite function to be split into component parts that represent the actual processes occurring better.

      ## Defining the Mortality Rate

      When a population is small, it can be assumed that mortality due to population density effects will be very low. For this tutorial, it will be proposed that no mortality due to population density effects occurs until a minimum of 1000 individuals is present (this might be the organism’s population on a rose bush). The proposition further suggests that as the population increases, density dependent mortality rate increases in direct proportion until once the population reaches 100,000 individuals, the mortality rate becomes 1. This mathematical structure suggests a “Linear above Threshold” function. If the data is plotted (Figure 6-1) the slope can be calculated and is approximately equal to 0.000001. For this tutorial, it is assumed that the population on the x-axis is the population of the stage whose mortality rate is being calculated (i.e., adults affect adult density dependent mortality and juveniles affect juvenile mortality). This is obviously not realistic, and an exercise suggested at the end of the tutorial will propose a better model.

      ![Image name](Figure6_1.png)

      #### Figure Density-dependent mortality function

      ### Juvenile Density dependent Morality

      Steps

      1. Add a **MultiplyFunction** to **Mortality** rename **DensityDependentMortality**
      2. Add a **VariableReference** to **DensityDependentMortality** rename **CohortPopulation**
      3. set to [Juvenile].CurrentCohort.Population
      4. Add a **LinearAfterThreshodFunction** to **DensityDependentMortality** rename **DensityDependentMortality**
      5. Set **XProperty** to [LifeCycle].Juvenile.TotalPopulation
      6. set **XValueTrigger** to **1000**
      7. set **Gradient** to **1000**

      ### Adult Density dependent Morality

      Steps

      1. Add a **MultiplyFunction** to **Mortality** rename **DensityDependentMortality**
      2. Add a **VariableReference** to **DensityDependentMortality** rename **CohortPopulation**
      3. set to [Adult].CurrentCohort.Population
      4. Add a **LinearAfterThreshodFunction** to **DensityDependentMortality** rename **DensityDependentMortality**
      5. Set **XProperty** to [LifeCycle].Adult.TotalPopulation
      6. set **XValueTrigger** to **1000**
      7. set **Gradient** to **1000**

      ## Simulation set up

      Return the clock and met file to what they were in tutorial 1.2

      Simulation Timing
      ----------------------------------------------------------
      |APSIM Object        | Description         | Values       |
      | :----------------: | :-----------:       |:-----------: |
      | Clock              |                     |              |
      |                    | Start simulation =  | 01/01/2000   |
      |                    | End simulation   =  | 31/12/2016   |
      |                    |                     |              |
      | Weather            |                     |              |
      |                    | Select met file =   |Toowoomba.met |
      |                    |                     |              |

      ## Report

      Add a Total Population Report and Figure

      **Run APSIM**

      ## Conclusion

      Questions

      How long does it take for the population to die out?

      Change the Met file to Gatton.met

      Does the Populations approach equilibrium in the long term

      What is the main difference between the climates of Gatton and Toowoomba ?

      In tutorial 6 we have simulated the PseudoAphid population for a period of 17 years instead of the three-monthly or annual periods used in earlier tutorials.

      Note that while the adult and juvenile populations fluctuate seasonally, they do not increase exponentially and remain within boundaries.
    Clock: Start=2000-01-01; End=2016-12-31
    Summary SummaryFile
    Weather: FileName=Gatton.met
    SoilArbitrator
    MicroClimate: a_interception=0; b_interception=1; c_interception=0; d_interception=0; soil_albedo=0.3; SoilHeatFluxFraction=0.4; MinimumHeightDiffForNewLayer=0; NightInterceptionFraction=0.5; ReferenceHeight=2
    Zone Field: Area=1; Slope=0; AspectAngle=0; Altitude=50
      Report: EventNames=[Clock].DoReport
        VariableNames:
          [Clock].Today
          [Clock].Today.DayOfYear
          [LifeCycle].Juvenile.TotalPopulation
          [LifeCycle].Adult.TotalPopulation
          [LifeCycle].Adult.CohortCount
          [LifeCycle].Adult.Mortalities
          [LifeCycle].TotalPopulation
          [LifeCycle].Juvenile.Mortalities
      Fertiliser
      Soil: same as Tutorial_1_0_PseudoAphid_Start.Field.Soil
      SurfaceOrganicMatter: InitialResidueName=wheat_stubble; InitialResidueType=wheat; InitialResidueMass=500; InitialStandingFraction=0; InitialCPR=0; InitialCNR=100
      Plant Wheat
      LifeCycle
        LifeCyclePhase Juvenile: Immigrants=0; DevelopmentRate=0; Mortalities=0; Graduates=0; Progeny=0; Emigrants=0
          AddFunction Development: same as Tutorial_5_1_PseudoAphid_TempDepMortality.Field.LifeCycle.Juvenile.Development
          AddFunction Mortality
            MultiplyFunction LowTempMortality
              VariableReference CohortPopulation: VariableName=[Juvenile].CurrentCohort.Population
              LinearInterpolationFunction LowTempMortality
                XYPairs: X=[-6, 0, 4]; Y=[1, 0.4, 0]
                VariableReference XValue: VariableName=[Weather].MinT
            MultiplyFunction HighTempMortality
              VariableReference CohortPopulation: VariableName=[Juvenile].CurrentCohort.Population
              LinearInterpolationFunction HighTempMortality
                XYPairs: X=[34, 44, 54]; Y=[0, 0.5, 1]
                VariableReference XValue: VariableName=[Weather].MaxT
            MultiplyFunction DensityDependentMortality
              VariableReference CohortPopulation: VariableName=[Juvenile].CurrentCohort.Population
              LinearAfterThresholdFunction DensityDependentMortality: XProperty=[LifeCycle].Juvenile.TotalPopulation; XTrigger=1000; Slope=1e-06
          Constant Reproduction: FixedValue=0
          Constant Migration: FixedValue=0
          ProgenyDestinationPhase ProgenyDestination: NameOfLifeCycleForProgeny=LifeCycle
        LifeCyclePhase Adult: Immigrants=0; DevelopmentRate=0; Mortalities=0; Graduates=0; Progeny=0; Emigrants=0
          AddFunction Mortality
            MultiplyFunction AgeBasedMortality
              VariableReference CohortPopulation: VariableName=[Adult].CurrentCohort.Population
              LinearInterpolationFunction AgeBasedMortality
                XYPairs: X=[0, 19.99, 20, 30]; Y=[0, 0, 1, 1]
                VariableReference XValue: VariableName=[Adult].CurrentCohort.ChronologicalAge
            MultiplyFunction DensityDependentMortality
              VariableReference CohortPopulation: VariableName=[Adult].CurrentCohort.Population
              LinearAfterThresholdFunction DensityDependentMortality: XProperty=[LifeCycle].Adult.TotalPopulation; XTrigger=1000; Slope=1e-06
            MultiplyFunction LowTempMortality: same as Tutorial_5_1_PseudoAphid_TempDepMortality.Field.LifeCycle.Adult.Mortality.LowTempMortality
            MultiplyFunction HighTempMortality
              VariableReference CohortPopulation: VariableName=[Adult].CurrentCohort.Population
              LinearInterpolationFunction HighTempMortality
                XYPairs: X=[34, 44, 54]; Y=[0, 0.5, 1]
                VariableReference XValue: VariableName=[Weather].MaxT
          MultiplyFunction Reproduction: same as Tutorial_1_1_PseudoAphid_AgeBasedDevt.Field.LifeCycle.Adult.Reproduction
          Constant Development: FixedValue=0
          Constant Migration: FixedValue=0
          ProgenyDestinationPhase ProgenyDestination: NameOfLifeCycleForProgeny=LifeCycle; NameOfPhaseForProgeny=Juvenile
      Infestation Initial Infestation Juvenile: TypeOfInfestation=0; InfestingOrganisumName=LifeCycle; InfestingPhaseName=Juvenile; ChronoAgeOfImmigrants=0; PhysAgeOfImmigrants=0
        Constant NumberOfImmigrants: FixedValue=1
  Simulation Tutorial_7_1_PseudoAphid_DrynessDepMortalityRain
    Memo
      # Tutorial_PseudoAphid Mortality (dryness-dependent based on rainfall)

       Tutorial-6-1-PseudoAphidMortality (DensityDepMort) is the starting point of this tutorial

      ## Introduction

      All organisms are sensitive to the absence of water, and the pseudo-aphid is no exception. Survival can be adversely affected if it is too dry, and in this tutorial a first attempt is made to model this sensitivity to dryness using rainfall. In the next tutorial, a better way of modelling the effects of inadequate rainfall will be demonstrated.

      Modelling Dryness Dependent Mortality

      As rainfall decreases, the soil dries out to produce plant stress and this in turn affects pseudo-aphid mortality. In this tutorial, this will be modelled very simply, by assuming that there is a particular level of rainfall each day that is required for no mortality due to dryness to occur. If insufficient rain falls during any one day, mortality on that day is linearly dependent on how far the rainfall is below that threshold. The relationship is illustrated in Figure 7-1. A Threshold of 10 mm\day is chosen – rainfall above that level produces no mortality. The slope of the function is selected so that 25 consecutive days without rainfall would produce an accumulated mortality of about 0.5.

      ![Image name](Figure7_1.png)
      ### Figure Mortality rate as a function of Rainfall

      Hence,

      (1 - m)25 = 0.5, where m = mortality/day

      i.e., 25 x ln(1− m) = ln(0.5)

      i.e., m = (1-e)(ln(0.5/25) = 0.027 (approximately)

      Using 0.025, which is close enough for our purpose, fixes the slope at –0.0025 (the “-“ sign is required as the slope is negative, with decreasing rain increasing the mortality rate).

      ### Juvenile dryness dependent Morality

      Steps

      Add a **MultiplyFunction** to **Mortality** rename **DrynessMortality**
      Add a **VariableReference** to **DrynessMortality** rename **CohortPopulation**
      set to [Juvenile].CurrentCohort.Population
      Add a **LinearInterpolationFunction** to DrynessMortality rename **DrynessMortality**
      Add XYpairs to the LinearInterpolationFunction **DrynessMortality**
      set x = (0, 10)  y = (0.025, 0)
      Add a **VariableReference** to the LinearInterpolationFunction **DrynessMortality** rename **XValue**
      Set **XProperty** to [weather].Rain

      ### Adult dryness dependent Morality

      Steps

      Add a **MultiplyFunction** to **Mortality** rename **DrynessMortality**
      Add a **VariableReference** to **DrynessMortality** rename **CohortPopulation**
      set to [Adult].CurrentCohort.Population
      Add a **LinearInterpolationFunction** to DrynessMortality rename **DrynessMortality**
      Add XYpairs to the LinearInterpolationFunction **DrynessMortality**
      set x = (0, 10)  y = (0.025, 0)
      Add a **VariableReference** to the LinearInterpolationFunction **DrynessMortality** rename **XValue**
      Set **XProperty** to [weather].Rain

      Simulation Timing
      ----------------------------------------------------------
      |APSIM Object        | Description         | Values       |
      | :----------------: | :-----------:       |:-----------: |
      | Clock              |                     |              |
      |                    | Start simulation =  | 01/01/2000   |
      |                    | End simulation   =  | 31/12/2016   |
      |                    |                     |              |
      | Weather            |                     |              |
      |                    | Select met file =   |Gatton.met |
      |                    |                     |              |
    Clock: Start=2000-01-01; End=2016-12-31
    Summary SummaryFile
    Weather: FileName=Gatton.met
    SoilArbitrator
    MicroClimate: a_interception=0; b_interception=1; c_interception=0; d_interception=0; soil_albedo=0.3; SoilHeatFluxFraction=0.4; MinimumHeightDiffForNewLayer=0; NightInterceptionFraction=0.5; ReferenceHeight=2
    Zone Field: Area=1; Slope=0; AspectAngle=0; Altitude=50
      Report: EventNames=[Clock].DoReport
        VariableNames:
          [Clock].Today
          [Clock].Today.DayOfYear
          [LifeCycle].Juvenile.TotalPopulation
          [LifeCycle].Adult.TotalPopulation
          [LifeCycle].Adult.CohortCount
          [LifeCycle].Adult.Mortalities
          [LifeCycle].TotalPopulation
          [LifeCycle].Juvenile.Mortalities
      Fertiliser
      Soil: same as Tutorial_1_0_PseudoAphid_Start.Field.Soil
      SurfaceOrganicMatter: InitialResidueName=wheat_stubble; InitialResidueType=wheat; InitialResidueMass=500; InitialStandingFraction=0; InitialCPR=0; InitialCNR=100
      Plant Wheat
      LifeCycle
        LifeCyclePhase Juvenile: Immigrants=0; DevelopmentRate=0; Mortalities=0; Graduates=0; Progeny=0; Emigrants=0
          AddFunction Development: same as Tutorial_5_1_PseudoAphid_TempDepMortality.Field.LifeCycle.Juvenile.Development
          AddFunction Mortality
            MultiplyFunction LowTempMortality
              VariableReference CohortPopulation: VariableName=[Juvenile].CurrentCohort.Population
              LinearInterpolationFunction LowTempMortality
                XYPairs: X=[-16, 0, 4]; Y=[1, 0.2, 0]
                VariableReference XValue: VariableName=[Weather].MinT
            MultiplyFunction HighTempMortality: same as Tutorial_6_1_PseudoAphid_DensityDepMortality.Field.LifeCycle.Juvenile.Mortality.HighTempMortality
            MultiplyFunction DensityDependentMortality
              VariableReference CohortPopulation: VariableName=[Juvenile].CurrentCohort.Population
              LinearAfterThresholdFunction DensityDependentMortality: XProperty=[LifeCycle].Juvenile.TotalPopulation; XTrigger=1000; Slope=1e-06
            MultiplyFunction DrynessMortality
              VariableReference CohortPopulation: VariableName=[Juvenile].CurrentCohort.Population
              LinearInterpolationFunction DrynessMortality
                XYPairs: X=[0, 10]; Y=[0.025, 0]
                VariableReference XValue: VariableName=[Weather].Rain
          Constant Reproduction: FixedValue=0
          Constant Migration: FixedValue=0
          ProgenyDestinationPhase ProgenyDestination: NameOfLifeCycleForProgeny=LifeCycle
        LifeCyclePhase Adult: Immigrants=0; DevelopmentRate=0; Mortalities=0; Graduates=0; Progeny=0; Emigrants=0
          AddFunction Mortality
            MultiplyFunction AgeBasedMortality: same as Tutorial_6_1_PseudoAphid_DensityDepMortality.Field.LifeCycle.Adult.Mortality.AgeBasedMortality
            MultiplyFunction DensityDependentMortality
              VariableReference CohortPopulation: VariableName=[Adult].CurrentCohort.Population
              LinearAfterThresholdFunction DensityDependentMortality: XProperty=[LifeCycle].Adult.TotalPopulation; XTrigger=1000; Slope=1e-06
            MultiplyFunction LowTempMortality
              VariableReference CohortPopulation: VariableName=[Adult].CurrentCohort.Population
              LinearInterpolationFunction LowTempMortality
                XYPairs: X=[-16, -4, -2, 0, 1, 2, 3, 4]; Y=[1, 0.4, 0.3, 0.2, 0.15, 0.1, 0.05, 0]
                VariableReference XValue: VariableName=[Weather].MinT
            MultiplyFunction HighTempMortality: same as Tutorial_6_1_PseudoAphid_DensityDepMortality.Field.LifeCycle.Adult.Mortality.HighTempMortality
            MultiplyFunction DrynessMortality
              VariableReference CohortPopulation: VariableName=[Adult].CurrentCohort.Population
              LinearInterpolationFunction DrynessMortality
                XYPairs: X=[0, 10, -, -, -, -, -, -, -, -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]; Y=[0.025, 0, -, -, -, -, -, -, -, -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]
                VariableReference XValue: VariableName=[Weather].Rain
          MultiplyFunction Reproduction: same as Tutorial_1_1_PseudoAphid_AgeBasedDevt.Field.LifeCycle.Adult.Reproduction
          Constant Development: FixedValue=0
          Constant Migration: FixedValue=0
          ProgenyDestinationPhase ProgenyDestination: NameOfLifeCycleForProgeny=LifeCycle; NameOfPhaseForProgeny=Juvenile
      Infestation Initial Infestation Juvenile: TypeOfInfestation=0; InfestingOrganisumName=LifeCycle; InfestingPhaseName=Juvenile; ChronoAgeOfImmigrants=0; PhysAgeOfImmigrants=0
        Constant NumberOfImmigrants: FixedValue=1
  Simulation Tutorial_8_1_PseudoAphid_DrynessDepMortalitySoil
    Memo
      # Tutorial_PseudoAphid Mortality (dryness-dependent based on soil moisture)

       Tutorial-7-1-PseudoAphidMortality (dryness-dependent based on rainfall) is the starting point of this tutorial

      ## Introduction

      Tutorial 7 implied that rainfall by itself may not be the best variable to use in modelling dryness dependent mortality. This is due to the fact that rainfall is rather erratic in nature, but its effects on insects are generally not direct. The soil and plant environment tends to integrate the effects of rainfall over time. In addition, there are the effects of atmospheric moisture (measured as relative humidity or saturation deficit) which may be more appropriate drivers of insect mortality.

      Soil moisture is usually the dominant factor determining microclimatic conditions and the moisture content of vegetation. For an insect that lives in close contact with the plant (such as the Pseudo-aphid), soil moisture alone can provide a very useful indicator of the moisture conditions the insect is experiencing. ApsimX contains a soil module that is designed to simulate the changes in soil moisture with given rainfall and evaporation. The module can be described in detail (right mouse click on the Soil module and select "Include in Documentation". When documentation is generated (Simulations>Create documentation), then a detailed description of soil processes will be included in the documentation. This tutorial will illustrate the use of this module within the Pseudo-aphid model.

      Soil Moisture in the Soil Module

      The Soil module provides a number of output variables that reflects the simulated current state of the soil’s moisture content in response to rainfall, evaporation, runoff, drainage and plant uptake (where plants are included in the simulation). The soil moisture will be scaled between 0 and 2, with a value of 0 indicating a dry soil at lower limit, 1 denoting a soil at drained upper limit, and 2 denoting a saturated soil.

      The “Lifecycle” module previously used rainfall as the input variable that controlled dryness-dependent mortality (in Tutorial 7). This will now be changed so that soil moisture levels control this mortality. The parameters will be chosen so that dryness-dependent mortality commences to have an effect once the soil moisture level drops below drained upper limit.

      ### Juvenile Soil Dryness dependent Morality

      Steps

      1. **modify** Juvenile > DrynessMortality > interpolationfunction **DrynessMortality** **xValue** to [SoilWaterScale]
      2. **modify** Juvenile > DrynessMortality > interpolationfunction **DrynessMortality** **XYPairs** to

      XY Pairs
      --------------------------------------------
      |X                   | Y                   |
      | :----------------: | :-----------:       |
      | 0                  |     1               |
      | 1                  |     0               |
      | 2                  |     0               |

      ### Adult Soil Dryness dependent Morality

      Steps

      1. **modify** Adult > DrynessMortality > interpolationfunction **DrynessMortality** **xValue** to [SoilWaterScale]
      2. **modify** Adult > DrynessMortality > interpolationfunction **DrynessMortality** **XYPairs** to

      XY Pairs
      --------------------------------------------
      |X                   | Y                   |
      | :----------------: | :-----------:       |
      | 0                  |     1               |
      | 1                  |     0               |
      | 2                  |     0               |
    Clock: Start=2000-01-01; End=2016-12-31
    Summary SummaryFile
    Weather: FileName=Gatton.met
    SoilArbitrator
    MicroClimate: a_interception=0; b_interception=1; c_interception=0; d_interception=0; soil_albedo=0.3; SoilHeatFluxFraction=0.4; MinimumHeightDiffForNewLayer=0; NightInterceptionFraction=0.5; ReferenceHeight=2
    Zone Field: Area=1; Slope=0; AspectAngle=0; Altitude=50
      Report: EventNames=[Clock].DoReport
        VariableNames:
          [Clock].Today
          [Clock].Today.DayOfYear
          [LifeCycle].Juvenile.TotalPopulation
          [LifeCycle].Adult.TotalPopulation
          [LifeCycle].Adult.CohortCount
          [LifeCycle].Adult.Mortalities
          [LifeCycle].TotalPopulation
          [LifeCycle].Juvenile.Mortalities
      Fertiliser
      Soil: same as Tutorial_1_0_PseudoAphid_Start.Field.Soil
      SurfaceOrganicMatter: InitialResidueName=wheat_stubble; InitialResidueType=wheat; InitialResidueMass=500; InitialStandingFraction=0; InitialCPR=0; InitialCNR=100
      Plant Wheat
      LifeCycle
        LifeCyclePhase Juvenile: Immigrants=0; DevelopmentRate=0; Mortalities=0; Graduates=0; Progeny=0; Emigrants=0
          AddFunction Development: same as Tutorial_5_1_PseudoAphid_TempDepMortality.Field.LifeCycle.Juvenile.Development
          AddFunction Mortality
            MultiplyFunction LowTempMortality: same as Tutorial_7_1_PseudoAphid_DrynessDepMortalityRain.Field.LifeCycle.Juvenile.Mortality.LowTempMortality
            MultiplyFunction HighTempMortality: same as Tutorial_6_1_PseudoAphid_DensityDepMortality.Field.LifeCycle.Juvenile.Mortality.HighTempMortality
            MultiplyFunction DensityDependentMortality
              VariableReference CohortPopulation: VariableName=[Juvenile].CurrentCohort.Population
              LinearAfterThresholdFunction DensityDependentMortality: XProperty=[LifeCycle].Juvenile.TotalPopulation; XTrigger=1000; Slope=1e-06
            MultiplyFunction SoilDrynessMortality
              VariableReference CohortPopulation: VariableName=[Juvenile].CurrentCohort.Population
              LinearInterpolationFunction SoilDrynessMortality
                SoilWaterScale
                XYPairs: X=[0, 1, 2]; Y=[1, 0, 0]
                VariableReference XValue: VariableName=[SoilWaterScale]
          Constant Reproduction: FixedValue=0
          Constant Migration: FixedValue=0
          ProgenyDestinationPhase ProgenyDestination: NameOfLifeCycleForProgeny=LifeCycle
        LifeCyclePhase Adult: Immigrants=0; DevelopmentRate=0; Mortalities=0; Graduates=0; Progeny=0; Emigrants=0
          AddFunction Mortality
            MultiplyFunction AgeBasedMortality: same as Tutorial_6_1_PseudoAphid_DensityDepMortality.Field.LifeCycle.Adult.Mortality.AgeBasedMortality
            MultiplyFunction DensityDependentMortality
              VariableReference CohortPopulation: VariableName=[Adult].CurrentCohort.Population
              LinearAfterThresholdFunction DensityDependentMortality: XProperty=[LifeCycle].Adult.TotalPopulation; XTrigger=1000; Slope=1e-06
            MultiplyFunction LowTempMortality: same as Tutorial_7_1_PseudoAphid_DrynessDepMortalityRain.Field.LifeCycle.Adult.Mortality.LowTempMortality
            MultiplyFunction HighTempMortality: same as Tutorial_6_1_PseudoAphid_DensityDepMortality.Field.LifeCycle.Adult.Mortality.HighTempMortality
            MultiplyFunction SoilDrynessMortality
              VariableReference CohortPopulation: VariableName=[Adult].CurrentCohort.Population
              LinearInterpolationFunction SoilDrynessMortality
                SoilWaterScale
                XYPairs: X=[0, 1, 2]; Y=[1, 0, 0]
                VariableReference XValue: VariableName=[SoilWaterScale]
          MultiplyFunction Reproduction: same as Tutorial_1_1_PseudoAphid_AgeBasedDevt.Field.LifeCycle.Adult.Reproduction
          Constant Development: FixedValue=0
          Constant Migration: FixedValue=0
          ProgenyDestinationPhase ProgenyDestination: NameOfLifeCycleForProgeny=LifeCycle; NameOfPhaseForProgeny=Juvenile
      Infestation Initial Infestation Juvenile: TypeOfInfestation=0; InfestingOrganisumName=LifeCycle; InfestingPhaseName=Juvenile; ChronoAgeOfImmigrants=0; PhysAgeOfImmigrants=0
        Constant NumberOfImmigrants: FixedValue=1
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