Simulations: Version=76
  Memo About this example
    # Manager Model Documentation and Examples

    **Manager** is the model in APSIM that is used to script the on-farm management of a simulation. The examples in this document increase in complexity. [Read this to better understand the structure of a manager script](https://apsimnextgeneration.netlify.com/usage/writemanagerscript)
  DataStore
  Simulation NTopupSimulation
    Memo Notes
      # Change sowing fertiliser to a topup rule

      This simulation started with the sowing fertiliser rule from the management toolbox.

      		using System;
      		using Models.Core;
      		using Models.PMF;
      		namespace Models
      		{
      			[Serializable]
      			public class Script : Model
      			{
      				[Link] Clock Clock;
      				[Link] Fertiliser Fertiliser;

      				[Description("Crop to be fertilised")]
      				public IPlant Crop { get; set; }

      				[Description("Type of fertiliser to apply? ")]
      				public Fertiliser.Types FertiliserType { get; set; }

      				[Description("Amount of fertiliser to be applied (kg/ha)")]
      				public double Amount { get; set; }

      				[EventSubscribe("Sowing")]
      				private void OnSowing(object sender, EventArgs e)
      				{
      					Model crop = sender as Model;
      					if (Crop != null && crop.Name.ToLower() == (Crop as IModel).Name.ToLower())
      						Fertiliser.Apply(Amount: Amount, Type: FertiliserType);
      				}
      			}
      		}

      This script has 3 user-input properties, the sown crop model that the rule applies to, the fertiliser type to apply and the amount of fertiliser to apply:

      		[Description("Crop to be fertilised")]
      		public IPlant Crop { get; set; }

      		[Description("Type of fertiliser to apply? ")]
      		public Fertiliser.Types FertiliserType { get; set; }

      		[Description("Amount of fertiliser to be applied (kg/ha)")]
      		public double Amount { get; set; }

      For a simple N topup rule we don't need the crop or the fertiliser type and instead of specifying an amount to apply, we'll change this to a threshold amount to which the script will keep the NO3 level to. We'll rename this property to *NThreshold*:

      		[Description("Threshold amount of NO3 below which fertiliser will be added (kg/ha)")]
      		public double NThreshold { get; set;}

      Next we need to add a link to the NO3 solute as we'll need this to determine how much to apply. The new Link will look like this:

              [Link(ByName=true)] Solute NO3;

      This link looks different to the others because there are multiple solutes in the simulation and we want to make sure we are getting the NO3 solute. A regular *[Link]* looks for a model of the correct type and doesn't use the name to perform the match. If we used a regular link for this solute then we will get a link to the first solute found which may not be NO3. To fix this we need to specify that ByName=true, meaning that the link will be resolved by looking at the name of the variable (NO3 in this case) to do the match.

      For this link to work though, we need to include another namespace. The nutrient model and all solutes are contained in the *Models.Soils.Nutrients* namespace so we need to add this to the top of the script:

      		using Models.Soils.Nutrients;

      Currently in the script there is a OnSowing method that gets called whenever a sowing event occurs. We need to change this to a method that gets called every day of the simulation. Most management scripts use DoManagement for this purpose.

      		[EventSubscribe("DoManagement")]
      		private void OnDoManagement(object sender, EventArgs e)

      The event name is *DoManagement* and this goes in the* EventSubscribe* attribute. The convention then is to name the method the same as the event but with *On* prefixed to the front of the event name.

      Now we can perform the calculation of the amount of NO3 to apply.

      		double NAmount = Threshold - MathUtilities.Sum(NO3.kgha);

      *NO3.kgha* is an array variable (double[]) with one value per layer. We need to sum this over the whole array so we use a *MathUtilities.Sum* function to do this. For this to compile though we need to include another namespace at the top of the script

      		using APSIM.Shared.Utilities;

      We can remove the existing references to *Crop* as this rule will apply all year around, not just within crop. We also hard code the fertiliser type on the apply line.

      		Fertiliser.Apply(Amount: NAmount, Type: Fertiliser.Types.NO3N);

      Finally, we rename the manager model to *NTopup*. The final script looks like:

      		using System;
      		using Models.Core;
      		using Models.PMF;
      		using Models.Soils.Nutrients;
      		using APSIM.Shared.Utilities;
      		namespace Models
      		{
      			[Serializable]
      			public class Script : Model
      			{
      				[Link] Clock Clock;
      				[Link] Fertiliser Fertiliser;
      				[Link(ByName=true)] Solute NO3;

      				[Description("Threshold amount of NO3 below which fertiliser will be added (kg/ha)")]
      				public double NThreshold { get; set;}

      				[EventSubscribe("DoManagement")]
      				private void OnDoManagement(object sender, EventArgs e)
      				{
      					double NAmount = NThreshold - MathUtilities.Sum(NO3.kgha);
      					Fertiliser.Apply(Amount: NAmount, Type: Fertiliser.Types.NO3N);
      				}
      			}
      		}
    Clock: Start=1900-01-01; End=1900-12-31
    Summary SummaryFile
    Weather: FileName=%root%\Examples\WeatherFiles\Dalby.met
    SoilArbitrator
    Zone Field: Area=1; Slope=0; AspectAngle=0; Altitude=50
      Report: EventNames=[Clock].EndOfDay
        VariableNames:
          [Clock].Today
          sum([NO3].kgha) as no3
      Fertiliser
      Soil: ASCOrder=Vertosol; ASCSubOrder=Black; SoilType=Clay; Site=Norwin; NearestTown=Norwin; Region=Darling Downs and Granite Belt; State=Queensland; Country=Australia; NaturalVegetation=Qld. Bluegrass, possible Qld. Blue gum; ApsoilNumber=900; Latitude=-27.581836; Longitude=151.320206; LocationAccuracy=+/- 20m
        DataSource=CSIRO Sustainable Ecosystems, Toowoomba; Characteriesd as part of the GRDC funded project"Doing it better, doing it smarter, managing soil water in Australian agriculture' 2011
        Comments=OC, CLL for all crops estimated-based on Bongeen Mywybilla Soil No1
        Physical
          Thickness  BD       AirDry    LL15      DUL       SAT       KS
          150        1.01056  0.13025   0.2605    0.521     0.588655  20
          150        1.07146  0.198689  0.248362  0.496723  0.565677  20
          300        1.09394  0.28      0.28      0.488438  0.557193  20
          300        1.15861  0.28      0.28      0.480297  0.532787  20
          300        1.17301  0.28      0.28      0.471584  0.527354  20
          300        1.16287  0.28      0.28      0.457071  0.53118   20
          300        1.1875   0.28      0.28      0.452332  0.521888  20
          SoilCrop WheatSoil: LL=[0.261, 0.248, 0.28, 0.306, 0.36, 0.392, 0.446]; KL=[0.06, 0.06, 0.06, 0.04, 0.04, 0.02, 0.01]; XF=[1, 1, 1, 1, 1, 1, 1]
        SoilWater: SummerDate=1-Nov; SummerU=5; SummerCona=5; WinterDate=1-Apr; WinterU=5; WinterCona=5; DiffusConst=40; DiffusSlope=16; Salb=0.12; CN2Bare=73; CNRed=20; CNCov=0.8; max_pond=0; Thickness=[150, 150, 300, 300, 300, 300, 300]; SWCON=[0.3, 0.3, 0.3, 0.3, 0.3, 0.3, 0.3]; PrecipitationInterception=0
        Organic: FOMCNRatio=40
          Thickness  Carbon  SoilCNRatio  FBiom  FInert  FOM
          150        1.2     12           0.04   0.4     347.129
          150        0.96    12           0.02   0.6     270.344
          300        0.6     12           0.02   0.8     163.972
          300        0.3     12           0.02   1       99.4541
          300        0.18    12           0.01   1       60.322
          300        0.12    12           0.01   1       36.5871
          300        0.12    12           0.01   1       22.1912
        Chemical
          Thickness  NO3N  NH4N  PH
          150        1     0.1   8
          150        1     0.1   8
          300        1     0.1   8
          300        1     0.1   8
          300        1     0.1   8
          300        1     0.1   8
          300        1     0.1   8
        InitialWater: PercentMethod=1; FractionFull=1
        Sample InitialN: Thickness=[150, 150, 300, 300, 300, 300, 300]; SWUnits=Volumetric; OCUnits=Total; PHUnits=Water
        CERESSoilTemperature
        Nutrient
          DirectedGraphInfo={Nodes=[{Name=Inert, OutlineColour=Black}, {Name=SurfaceResidue, OutlineColour=Black}, {Name=FOMLignin, OutlineColour=Black}, {Name=FOMCellulose, OutlineColour=Black}, {Name=FOMCarbohydrate, OutlineColour=Black}, {Name=Microbial, OutlineColour=Black}, {Name=Humic, OutlineColour=Black}, {Name=Urea, OutlineColour=Black}, {Name=NO3, OutlineColour=Black}, {Name=NH4, OutlineColour=Black}, {Name=Atmosphere, OutlineColour=White}, {Name=PlantAvailableNO3, OutlineColour=Black}, {Name=PlantAvailableNH4, OutlineColour=Black}], Arcs=[{SourceName=SurfaceResidue, DestinationName=Microbial}, {SourceName=SurfaceResidue, DestinationName=Humic}, {SourceName=FOMLignin, DestinationName=Microbial}, {SourceName=FOMLignin, DestinationName=Humic}, {SourceName=FOMCellulose, DestinationName=Microbial}, {SourceName=FOMCellulose, DestinationName=Humic}, {SourceName=FOMCarbohydrate, DestinationName=Microbial}, {SourceName=FOMCarbohydrate, DestinationName=Humic}, {SourceName=Microbial, DestinationName=Microbial}, {SourceName=Microbial, DestinationName=Humic}, {SourceName=Humic, DestinationName=Microbial}, {SourceName=Urea, DestinationName=NH4}, {SourceName=NO3, DestinationName=Atmosphere}, {SourceName=NH4, DestinationName=NO3}]}
      SurfaceOrganicMatter: InitialResidueName=wheat_stubble; InitialResidueType=wheat; InitialResidueMass=500; InitialStandingFraction=0; InitialCPR=0; InitialCNR=100; FractionFaecesAdded=1
      Plant Wheat: CropType=Wheat; IsEnding=false; DaysAfterEnding=0
      MicroClimate: a_interception=0; b_interception=1; c_interception=0; d_interception=0; soil_albedo=0.3; SoilHeatFluxFraction=0.4; NightInterceptionFraction=0.5; ReferenceHeight=2
      Manager NTopup
        NThreshold = 200
```csharp
using System;
using Models.Core;
using Models.PMF;
using Models.Soils.Nutrients;
using APSIM.Shared.Utilities;
namespace Models
{
    [Serializable]
    public class Script : Model
    {
        [Link] Clock Clock;
        [Link] Fertiliser Fertiliser;
        [Link(ByName=true)] Solute NO3;

		[Description("Threshold amount of NO3 below which fertiliser will be added (kg/ha)")]
		public double NThreshold { get; set;}

        
        [EventSubscribe("DoManagement")]
        private void OnDoManagement(object sender, EventArgs e)
        {
        	double NAmount = NThreshold - MathUtilities.Sum(NO3.kgha);
            Fertiliser.Apply(Amount: NAmount, Type: Fertiliser.Types.NO3N);
        }
    }
}
```
      Manager Harvest
```csharp
using System;
using Models.Core;
using Models.PMF;
using Models.Soils;
using Models.Soils.Nutrients;
using Models.Utilities;
using APSIM.Shared.Utilities;

namespace Models
{
    [Serializable]
    public class Script : Model
    {
        [Link] Plant Wheat;

        [EventSubscribe("DoManagement")]
        private void OnDoManagement(object sender, EventArgs e)
        {
            if (Wheat.IsReadyForHarvesting)
            {
               Wheat.Harvest();
               Wheat.EndCrop();    
            }
        
        }
        
    }
}
```
      Manager SowingRule1
        StartDate = 1-may
        EndDate = 10-jul
        MinESW = 100
        MinRain = 25
        RainDays = 7
        CultivarName = Hartog
        SowingDepth = 30
        RowSpacing = 250
        Population = 120
```csharp
using System;
using Models.Core;
using Models.PMF;
using Models.Soils;
using Models.Soils.Nutrients;
using Models.Utilities;
using APSIM.Shared.Utilities;

namespace Models
{
    [Serializable]
    public class Script : Model
    {
        [Link] Clock Clock;
        [Link] Fertiliser Fertiliser;
        [Link] Summary Summary;
        [Link] Plant Wheat;
        [Link] Soil Soil; 
        Accumulator accumulatedRain;
        
        [Description("Start of sowing window (d-mmm)")]
        public string StartDate { get; set;}
        [Description("End of sowing window (d-mmm)")]
        public string EndDate { get; set;}
        [Description("Minimum extractable soil water for sowing (mm)")]
        public double MinESW { get; set;}
        [Description("Accumulated rainfall required for sowing (mm)")]
        public double MinRain { get; set;}
        [Description("Duration of rainfall accumulation (d)")]
        public int RainDays { get; set;}
        [Description("Cultivar to be sown")]
        [Display(Type=DisplayType.CultivarName, PlantName = "Wheat")]
        public string CultivarName { get; set;}
        [Description("Sowing depth (mm)")]
        public double SowingDepth { get; set;}        
        [Description("Row spacing (mm)")]
        public double RowSpacing { get; set;}    
        [Description("Plant population (/m2)")]
        public double Population { get; set;}    
        
        
        [EventSubscribe("Commencing")]
        private void OnSimulationCommencing(object sender, EventArgs e)
        {
            accumulatedRain = new Accumulator(this, "[Weather].Rain", RainDays);
        }
        

        [EventSubscribe("DoManagement")]
        private void OnDoManagement(object sender, EventArgs e)
        {
            accumulatedRain.Update();
            
            if (DateUtilities.WithinDates(StartDate,Clock.Today,EndDate) &&
                !Wheat.IsAlive &&
                MathUtilities.Sum(Soil.SoilWater.ESW) > MinESW &&
                accumulatedRain.Sum > MinRain)
            {
               Wheat.Sow(population:Population, cultivar:CultivarName, depth:SowingDepth, rowSpacing:RowSpacing);    
            }
        
        }
        
    }
}
```
  Simulation WaterAndNTopupSimulation
    Memo Notes
      # Change N topup rule to N and water topup rule

      This simulation extends the previous simulation by adding a water topup rule to the topup rule. This is useful when a potential crop/pasture yield is required.

      This script has a single user-input property, the N threshold below which fertiliser will be applied.

      		[Description("Threshold amount of NO3 below which fertiliser will be added (kg/ha)")]
      		public double NThreshold { get; set;}

      This is still needed but we need to add a similar property for a water threshold.

      		[Description("Threshold amount of water below which irrigation will be added (mm)")]
      		public double WaterThreshold { get; set;}

      Next we need to add a link to the Soil model as we'll need this to get the current value of soil water.

      		[Link] Soil Soil;

      We then need to add an irrigation model to our field. Then we can add a link to it.

      		[Link] Irrigation Irrigation;

      For this link to work though, we need to include another namespace. The soil model is contained in the *Models.Soils* namespace so we need to add this to the top of the script:

      		using Models.Soils;

      In the *OnDoManagement* script, we can calculate the amount of water to add then then apply the irrigation if the amount is greater than zero.
      		double SWAmount = WaterThreshold - MathUtilities.Sum(Soil.Water);
      		if (SWAmount > 0)
                 		Irrigation.Apply(SWAmount);

      Finally, the manager model should be renamed to something more meaningful e.g. *NAndWaterTopup*. The final script looks like:

      		using System;
      		using Models.Core;
      		using Models.PMF;
      		using Models.Soils.Nutrients;
      		using APSIM.Shared.Utilities;
      		using Models.Soils;
      		namespace Models
      		{
      			[Serializable]
      			public class Script : Model
      			{
      				[Link] Clock Clock;
      				[Link] Fertiliser Fertiliser;
      				[Link(ByName=true)] Solute NO3;
      				[Link] Soil Soil;
      				[Link] Irrigation Irrigation;

      				[Description("Threshold amount of NO3 below which fertiliser will be added (kg/ha)")]
      				public double NThreshold { get; set;}

      				[Description("Threshold amount of water below which irrigation will be added (mm)")]
      				public double WaterThreshold { get; set;}

      				[EventSubscribe("DoManagement")]
      				private void OnDoManagement(object sender, EventArgs e)
      				{
      					double NAmount = NThreshold - MathUtilities.Sum(NO3.kgha);
      					Fertiliser.Apply(Amount: NAmount, Type: Fertiliser.Types.NO3N);

      					double SWAmount = WaterThreshold - MathUtilities.Sum(Soil.Water);
      					if (SWAmount > 0)
      						Irrigation.Apply(SWAmount);
      				}
      			}
      		}
    Clock: Start=1900-01-01; End=1900-12-31
    Summary SummaryFile
    Weather: FileName=%root%\Examples\WeatherFiles\Dalby.met
    SoilArbitrator
    Zone Field: Area=1; Slope=0; AspectAngle=0; Altitude=50
      Report: EventNames=[Clock].EndOfDay
        VariableNames:
          [Clock].Today
          sum([NO3].kgha) as no3
          sum([Soil].Water) as SoilWater
      Fertiliser
      Soil: same as NTopupSimulation.Field.Soil
      SurfaceOrganicMatter: InitialResidueName=wheat_stubble; InitialResidueType=wheat; InitialResidueMass=500; InitialStandingFraction=0; InitialCPR=0; InitialCNR=100; FractionFaecesAdded=1
      Plant Wheat: CropType=Wheat; IsEnding=false; DaysAfterEnding=0
      MicroClimate: a_interception=0; b_interception=1; c_interception=0; d_interception=0; soil_albedo=0.3; SoilHeatFluxFraction=0.4; NightInterceptionFraction=0.5; ReferenceHeight=2
      Manager NAndWaterTopup
        NThreshold = 200
        WaterThreshold = 700
```csharp
using System;
using Models.Core;
using Models.PMF;
using Models.Soils.Nutrients;
using APSIM.Shared.Utilities;
using Models.Soils;
namespace Models
{
    [Serializable]
    public class Script : Model
    {
        [Link] Clock Clock;
        [Link] Fertiliser Fertiliser;
        [Link(ByName=true)] Solute NO3;
        [Link] Soil Soil;
        [Link] Irrigation Irrigation;

		[Description("Threshold amount of NO3 below which fertiliser will be added (kg/ha)")]
		public double NThreshold { get; set;}

	    [Description("Threshold amount of water below which irrigation will be added (mm)")]
    	public double WaterThreshold { get; set;}

        
        [EventSubscribe("DoManagement")]
        private void OnDoManagement(object sender, EventArgs e)
        {
        	double NAmount = NThreshold - MathUtilities.Sum(NO3.kgha);
            Fertiliser.Apply(Amount: NAmount, Type: Fertiliser.Types.NO3N);

           	double SWAmount = WaterThreshold - MathUtilities.Sum(Soil.Water);
           	if (SWAmount > 0)
           		Irrigation.Apply(SWAmount);
        }
    }
}
```
      Manager Harvest: same as NTopupSimulation.Field.Harvest
      Manager SowingRule1: same as NTopupSimulation.Field.SowingRule1
      Irrigation
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