Simulations: Version=156
  DataStore
    ExcelInput Observed: FileNames=[Observed.xlsx]; SheetNames=[Observed]
    PredictedObserved: PredictedTableName=DailyReport; ObservedTableName=Observed; FieldNameUsedForMatch=SimulationID; FieldName2UsedForMatch=Clock.Today; AllColumns=false
  Experiment Exp1
    Factors
      Permutation
        Factor Cult: Specification=[Sowing].Script.Cultivar = Dash,Booma
        Factor Nit
          CompositeFactor 150: Specifications=[FertiliserEvents]
            Operations FertiliserEvents
              2009-11-23  [Fertiliser].Apply(150, Fertiliser.Types.NO3N,10);
        Factor Irr
          CompositeFactor Full: Specifications=[IrrigationEvents]
            Operations Irrigtion Events
              2009-11-11  [Irrigation].Apply(20);
              2009-11-19  [Irrigation].Apply(25);
              2009-11-26  [Irrigation].Apply(25);
              2009-12-11  [Irrigation].Apply(20);
              2009-12-21  [Irrigation].Apply(35);
              2009-12-29  [Irrigation].Apply(40);
              2010-01-07  [Irrigation].Apply(35);
              2010-01-13  [Irrigation].Apply(30);
    Simulation Base
      Weather: FileName=%root%\Examples\WeatherFiles\lincoln.met
      Clock: Start=2009-09-01; End=2010-04-01
      Summary summaryfile
      SoilArbitrator Soil Arbitrator
      MicroClimate: a_interception=0; b_interception=1; c_interception=0; d_interception=0; SoilHeatFluxFraction=0.4; MinimumHeightDiffForNewLayer=0; NightInterceptionFraction=0.5; ReferenceHeight=2
      Zone Paddock: Area=1; Slope=0; AspectAngle=0; Altitude=50
        Manager Sowing
          InitialRootDepth = 10
          Cultivar = Booma
          SowingDate = 10/01/2009 00:00:00
```csharp
using Models.Soils;
using System;
using System.Linq;
using Models.Core;
using System.Collections.Generic;
using System.Text;
using Models.PMF;
using Models;
using System.Xml.Serialization;
using APSIM.Shared.Utilities;
using System.Data;
using Models.PMF.Interfaces;
using Models.Surface;

namespace Models
{
    [Serializable] 
    //[System.Xml.Serialization.XmlInclude(typeof(Model))]
    public class Script : Model
    {
        [Link] Plant Barley;
        [Link] Clock Clock;
        [Link] Zone zone;
        [Link] Simulation Simulation;
        [Link] SurfaceOrganicMatter SurfOM;
        
                
        [Description("Initial Root Depth")]
        public double InitialRootDepth { get; set; }
        [Description("Cultivar name")]
        public string Cultivar { get; set; }
        [Description("Sowing Date")]
        public DateTime SowingDate { get; set; }
        
        
        [EventSubscribe("DoManagement")]
        private void OnDoManagement(object sender, EventArgs e)
        {
            if (Clock.Today.Date == SowingDate)
            {
                Barley.Sow(cultivar: Cultivar, population: 280, depth: InitialRootDepth, rowSpacing: 150);
                
            }
        }
    }
}
```
        Operations IrrigationEvents
          2009-11-11  [Irrigation].Apply(20);
          2009-11-19  [Irrigation].Apply(25);
          2009-11-26  [Irrigation].Apply(25);
          2009-12-11  [Irrigation].Apply(20);
          2009-12-21  [Irrigation].Apply(35);
          2009-12-29  [Irrigation].Apply(40);
          2010-01-05  [Irrigation].Apply(35);
          2010-01-13  [Irrigation].Apply(30);
          2010-03-02  [Irrigation].Apply(40);
          2010-03-03  [Irrigation].Apply(40);
        Operations FertiliserEvents
          2009-11-23  [Fertiliser].Apply(150, Fertiliser.Types.NO3N,10);
        Operations Harvest
          2010-02-23  [Barley].Harvest();
        Soil: SoilType=NZ_sedementary; Region=Plains; State=Canterbury; Country=New Zealnd; Latitude=0; Longitude=0
          Chemical: Thickness=[150, 150, 300, 300, 300, 300]; PH=[6.6, 6.2, 5.7, 5.5, 5.5, 5.5]; PHUnits=Water
          Physical
            Thickness  BD   AirDry  LL15  DUL   SAT   KS
            200        1.1  0.05    0.07  0.33  0.48  4832.039
            200        1.1  0.1     0.1   0.28  0.48  389.229
            200        1.3  0.08    0.08  0.26  0.4   97
            200        1.2  0.1     0.1   0.27  0.38  97.995
            200        1.2  0.12    0.12  0.28  0.37  97.995
            200        1.2  0.12    0.12  0.28  0.36  97.995
            200        1.2  0.12    0.12  0.26  0.36  98
            200        1.2  0.12    0.12  0.25  0.36  98
            400        1.2  0.12    0.12  0.25  0.36  98
            SoilCrop BarleySoil: LL=[0.07, 0.1, 0.08, 0.1, 0.12, 0.12, 0.12, 0.12, 0.12]; KL=[0.1, 0.07, 0.06, 0.05, 0.04, 0.03, 0.03, 0.03, 0.02]; XF=[1, 1, 1, 1, 1, 1, 1, 1, 1]
          WaterBalance SoilWater: SummerDate=1-Nov; SummerU=6; SummerCona=2; WinterDate=1-Apr; WinterU=9; WinterCona=4.4; DiffusConst=0; DiffusSlope=0; Salb=0.18; CN2Bare=68; CNRed=20; CNCov=0.8; DischargeWidth=0; CatchmentArea=0; PSIDul=-100
            Thickness  SWCON  KLAT
            150        0.9    0
            150        0.9    0
            300        0.9    0
            300        0.9    0
            300        0.9    0
            300        0.9    0
          SoilNitrogen: fom_types=[default, manure, mucuna, lablab, shemp, stable]; fract_carb=[0.2, 0.3, 0.54, 0.57, 0.45, 0]; fract_cell=[0.7, 0.3, 0.37, 0.37, 0.47, 0.1]; fract_lign=[0.1, 0.4, 0.09, 0.06, 0.08, 0.9]; NPartitionApproach=0
          Organic: FOMCNRatio=20; CarbonUnits=Total
            Thickness  Carbon  SoilCNRatio  FBiom  FInert  FOM
            150        2.7     11           0.025  0.45    390.598
            150        2.5     11           0.025  0.6     289.362
            300        1.45    11           0.015  0.75    158.805
            300        0.32    11           0.01   0.9     87.1541
            300        0.24    11           0.01   0.96    47.8312
            300        0.24    11           0.01   0.96    26.2503
          CERESSoilTemperature Temperature
          Water: Thickness=[200, 200, 200, 200, 200, 200, 200, 200, 400]; InitialValues=[0.31, 0.28, 0.26, 0.27, 0.28, 0.28, 0.26, 0.25, 0.25]; FilledFromTop=false
          SoilNitrogenNO3 NO3: Thickness=[150, 150, 300, 300, 300, 300]; InitialValues=[14.6, 17.8, 6.8, 7.6, 10.2, 11.2]; InitialValuesUnits=ppm; WaterTableConcentration=0; D0=0; DepthConstant=0; MaxDepthSoluteAccessible=0; RunoffEffectivenessAtMovingSolute=0; MaxEffectiveRunoff=0
          SoilNitrogenNH4 NH4: Thickness=[150, 150, 300, 300, 300, 300]; InitialValues=[1.8, 1.9, 1.5, 1.3, 1.3, 0.9]; InitialValuesUnits=ppm; WaterTableConcentration=0; D0=0; DepthConstant=0; MaxDepthSoluteAccessible=0; RunoffEffectivenessAtMovingSolute=0; MaxEffectiveRunoff=0
          SoilNitrogenUrea Urea: Thickness=[150, 150, 300, 300, 300, 300]; InitialValues=[0, 0, 0, 0, 0, 0]; InitialValuesUnits=kg/ha; WaterTableConcentration=0; D0=0; DepthConstant=0; MaxDepthSoluteAccessible=0; RunoffEffectivenessAtMovingSolute=0; MaxEffectiveRunoff=0
        Plant Barley
        SurfaceOrganicMatter Surface Organic Matter: InitialResidueName=Barley_stubble; InitialResidueType=Barley; InitialResidueMass=1500; InitialStandingFraction=0; InitialCPR=0; InitialCNR=80
        Irrigation
        Fertiliser
        Report DailyReport: EventNames=[Clock].DoReport
          VariableNames:
            [Clock].Today
            [Barley].AboveGroundLive.Wt
            [Barley].Leaf.LAI
        Report HarvestReport: EventNames=[Clock].EndOfSimulation
          VariableNames:
            [Clock].Today
            [Barley].AboveGroundLive.Wt
            [Barley].Leaf.LAI
  Folder Importing data from spreadsheet
    Memo Notes
      APSIM is capable of importing observed data from an Excel spreadsheet and adding the data to graphs.

      To import data from a spreadsheet, add an ExcelInput model (under AddModel, PostSimulationTools) to the DataStore and rename it 'Observed'. You can then specify the name of the xlsx file and the worksheet name to import. When the simulation is run (or when the DataStore is refreshed - right click on DataStore), the data will be imported into a data table inside the .db file. Graphs can then be created with series that point to the data table and you can choose x and y field names to plot. The time series graphs below show the biomass and LAI columns plotted. Each graph has a predicted series and an observed series.

      **NOTE:**

      For this to work, it is important to ensure the simulation names in the spreadsheet (column A) **exactly** match the simulation names produced by the experiment. To see the expected names, click on the experiment and the simulation names will be shown on the right. If the names don't match, no observed data will be shown on the graphs.
  Folder Matching predicted and observed data
    Memo Notes
      Once observed data has been imported, you can add a 'PredictedObserved' model to the DataStore.
      You can then specify the name of the predicted table (usually the name of your report model e.g. DailyReport in our example) and observed table. You then need to specify one or more 'match fields' (column names) from the observed table to match on. Generally, this is SimulationID and Clock.Today. When the simulation is run (or when the DataStore is refreshed - right click on DataStore), the 'PredictedObserved' model will iterate through each value in the observed table and try and find a matching predicted value using the values of the 'match fields' (SimulationID and Clock.Today in our example).

      **NOTE:**

      For this to work though, it is important to ensure the column names in the spreadsheet **exactly** match the column names in the predicted (report) table. The simulation names also need to **exactly** match.

      ![](PredictedObserved.png)

      In the figure above, you can see the value of Barley.Leaf.LAI from the observed table was matched to the predicted value where the simulation name and Clock.Today values matched.

      You might also notice that the Predicted Observed table doesn't include above ground biomass. This is because the column name in the observed table (Barley.AboveGround.Wt) doesn't match the column name in the predicted table ((Barley.AboveGroundLive.Wt).

      The graph below was created with a series that points to the 'PredictedObserved' table and plots Predicted.Barley.Leaf.LAI against Observed.Barley.Leaf.LAI. This would not have been possible without the PredictedObserved model matching fields between 2 tables. The graph series also has a child 'Regression' model under it that displays the regression line.
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