Simulations: Version=122
  Memo readme
    PropertyDemo manager script contains examples of most options for controlling property UI. See tooltips and code comments for details.
  Folder
    Manager PropertyDemo
      Text =
      Texts =
      Message =
      File =
      Files =
      Directory =
      Day = Sunday
      CustomValue = Wheat
      Crop = [Wheat]
      Cultivar = Adv08_0008
      Table = StartOfWeekReport
      Column = y
      Colour = -11094807
      Flag = True
```csharp
using Models.Core;
using System;
using System.Linq;
using System.Collections.Generic;
using System.Drawing;
using Models.PMF;

namespace Models
{
	[Serializable]
	public class Script : Model
	{
		// -------------------------------------------------
		// Text inputs
		// -------------------------------------------------
		[Separator("Text inputs")]
		[Description("Single line text input")]
		[Tooltip("Enter some text")]
		public string Text { get; set; }

		[Description("Multi line text input")]
		[Tooltip("Enter a long message")]
		[Display(Type = DisplayType.MultiLineText)]
		public string Message { get; set; }

		[Description("Enter messages (one per line)")]
		[Tooltip("Each line will be treated as a separate element in the array")]
		[Display(Type = DisplayType.MultiLineText)]
		public string[] Texts { get; set; }

		[Description("Single file input")]
		[Tooltip("Select a single file")]
		[Display(Type = DisplayType.FileName)]
		public string File { get; set; }

		[Description("Multi-file input")]
		[Tooltip("If typing file names manually, separate them with commas")]
		[Display(Type = DisplayType.FileNames)]
		public string[] Files { get; set; }

		[Description("Directory input")]
		[Tooltip("Select directories")]
		[Display(Type = DisplayType.DirectoryName)]
		public string Directory { get; set; }

		// -------------------------------------------------
		// Dropdowns
		// -------------------------------------------------
		[Separator("Dropdowns")]
		[Description("Dropdown with custom values (static version)")]
		[Tooltip("Select a day of the week")]
		public DayOfWeek Day { get; set; }

		// This gives the ultimate flexibility for dropdowns. See comment
		// on GetCustomValues() function for more details.
		[Description("Dropdown with custom values (dynamic version)")]
		[Tooltip("The selected plant name will appear in this list. See code comment for details.")]
		[Display(Type = DisplayType.DropDown, Values = "GetCustomValues")]
		public string CustomValue { get; set; }

		// The type of this property (Plant in this case) determines
		// which models appear in the dropdown list.
		// Behaviour is undefined if there are multiple models with the
		// same name in scope. E.g. if there are 2 wheat models in the same zone.
		[Description("Dropdown with all plants in scope")]
		[Tooltip("Select a plant")]
		public Plant Crop { get; set; }

		// This shows a dropdown of all cultivar names. It gets complicated
		// when there are multiple plants in scope. If used as-is with no
		// extra options, it will just show the cultivars of the first crop
		// it finds. For more complicated scenarios, there are currently 2 options:
		//
		// 1. Specify a plant name manually. This will need to be manually changed
		//    after changing the selected plant in the plant drop-down. e.g.
		//    [Display(Type = DisplayType.CultivarName, PlantName = "Wheat")]
		//
		// 2. DisplayType.DropDown with a custom function
		//    (see 'Dropdown with custom values (dynamic version)' example).
		//
		// This needs to be fixed at some point...
		[Description("Dropdown of cultivar names (simple version)")]
		[Tooltip("See source code comment for details. This one is pretty flexible.")]
		[Display(Type = DisplayType.CultivarName)]
		public string Cultivar { get; set; }

		[Description("Dropdown of table names")]
		[Tooltip("If the simulation has never been run, this dropdown will be empty")]
		[Display(Type = DisplayType.TableName)]
		public string Table { get; set; }

		[Description("Dropdown of column names")]
		[Tooltip("The available columns are determined by the table name property. If there are multiple table name properties, the first will be used. If the simulation has never been run, this dropdown will be empty.")]
		[Display(Type = DisplayType.FieldName)]
		public string Column { get; set; }

		[Description("Dropdown with colours")]
		[Tooltip("Select a colour")]
		public Color Colour { get; set; }

		// -------------------------------------------------
		// Other
		// -------------------------------------------------
		[Separator("Other")]
		[Description("Checkbox")]
		[Tooltip("Checked = true, Unchecked = false")]
		public bool Flag { get; set; }

		// This function is called when using DisplayType.DropDown.
		// This function returns the values used to populate the dropdown.
		// The Values property in the [Display] attribute must be specified as
		// the name of this function without parentheses, like so:
		// [Display(Type = DisplayType.DropDown, Values = "GetCustomValues")]
		//
		// The function must accept no arguments and must return any
		// IEnumerable<string> - e.g. List<string>, string[], etc.
		public List<string> GetCustomValues()
		{
			List<string> result = new List<string>()
			{
				"foo",
				"bar"
			};

			// Add crop name to the dropdown, if a crop has been selected
			if (Crop != null)
				result.Add(Crop.Name);

			if (Day == DayOfWeek.Thursday)
				result.Add("Thursday has been selected");

			return result;
		}
	}

	public enum DayOfWeek
	{
		Sunday,
		Monday,
		Tuesday,
		Wednesday,
		Thursday,
		Friday,
		Saturday
	}
}
```
    BiomassRemoval ChildPropertyDemo
      OrganBiomassRemovalType Harvest: FractionLiveToRemove=0; FractionDeadToRemove=0; FractionLiveToResidue=1; FractionDeadToResidue=1
      OrganBiomassRemovalType Cut: FractionLiveToRemove=0; FractionDeadToRemove=0; FractionLiveToResidue=1; FractionDeadToResidue=1
      OrganBiomassRemovalType Prune: FractionLiveToRemove=0; FractionDeadToRemove=0; FractionLiveToResidue=0; FractionDeadToResidue=0
      OrganBiomassRemovalType Graze: FractionLiveToRemove=0; FractionDeadToRemove=0; FractionLiveToResidue=0; FractionDeadToResidue=0
    Plant Wheat
    Plant Barley
  DataStore
  Simulation
    Memo note
      Only reason for the simulation is so that the table name dropdown can have some values in it
    Clock: Start=2020-01-01; End=2020-01-10
    Summary
    Report DailyReport: EventNames=[Clock].DoReport
      VariableNames:
        [Clock].Today
        [Clock].Today.DayOfYear as x
    Report StartOfWeekReport: EventNames=[Clock].StartOfWeek
      VariableNames:
        [Clock].Today
        [Clock].Today.DayOfYear as y
