Simulations: Version=199
  Memo About this example
    # Report Model Documentation and Examples

    *Dean Holzworth (CSIRO, Australia) and Val Snow (AgResearch, New Zealand)*

    (Text last updated 24 October 2019)

    **Report** is the model in APSIM that is used to generate columns of simulation outputs for further analysis.

    The simulations in this example are to show examples of the different reporting capabilities and to provide a test that they continue to produce the correct results.

    The intention is that this documentation is read alongside the simulation that produced it to see the detail of the examples. The simulation is to be found under the "Examples" button as Report.apsim.
  DataStore
  Simulation SimpleReportingSim
    Clock: Start=1980-01-01; End=1990-12-31
    Summary SummaryFile
    Weather: FileName=%root%/Examples/WeatherFiles/AU_Dalby.met
    SoilArbitrator
    Zone Field: Area=1; Slope=0; AspectAngle=0; Altitude=50
      Manager Sowing
        StartDate = 1-may
        EndDate = 10-jul
        MinESW = 100
        MinRain = 25
        RainDays = 7
        CultivarName = Hartog
        SowingDepth = 30
        RowSpacing = 250
        Population = 120
```csharp
using APSIM.Numerics;
using Models.Climate;
using APSIM.Shared.Utilities;
using Models.Utilities;
using Models.Soils.Nutrients;
using Models.Soils;
using Models.PMF;
using Models.Core;
using System.Linq;
using System;
using Models.Interfaces;

namespace Models
{
    [Serializable]
    public class Script : Model
    {
        [Link] private Clock Clock;
        [Link] private Fertiliser Fertiliser;
        [Link] private Summary Summary;
        [Link(ByName = true)] private Plant Wheat;
        [Link] private Soil Soil;
        private Accumulator accumulatedRain;
        [Link]
        private ISoilWater waterBalance;
        
        [Description("Start of sowing window (d-mmm)")]
        public string StartDate { get; set;}
        [Description("End of sowing window (d-mmm)")]
        public string EndDate { get; set;}
        [Description("Minimum extractable soil water for sowing (mm)")]
        public double MinESW { get; set;}
        [Description("Accumulated rainfall required for sowing (mm)")]
        public double MinRain { get; set;}
        [Description("Duration of rainfall accumulation (d)")]
        public int RainDays { get; set;}
        [Description("Cultivar to be sown")]
        [Display(Type=DisplayType.CultivarName, PlantName = "Wheat")]
        public string CultivarName { get; set;}
        [Description("Sowing depth (mm)")]
        public double SowingDepth { get; set;}        
        [Description("Row spacing (mm)")]
        public double RowSpacing { get; set;}    
        [Description("Plant population (/m2)")]
        public double Population { get; set;}    
        
        
        [EventSubscribe("StartOfSimulation")]
        private void OnSimulationCommencing(object sender, EventArgs e)
        {
            accumulatedRain = new Accumulator(this, "[Weather].Rain", RainDays);
        }
        

        [EventSubscribe("DoManagement")]
        private void OnDoManagement(object sender, EventArgs e)
        {
            accumulatedRain.Update();
            
            if (DateUtilities.WithinDates(StartDate,Clock.Today,EndDate) &&
                !Wheat.IsAlive &&
                MathUtilities.Sum(waterBalance.ESW) > MinESW &&
                accumulatedRain.Sum > MinRain)
            {
               Wheat.Sow(population:Population, cultivar:CultivarName, depth:SowingDepth, rowSpacing:RowSpacing);    
            }
        
        }
        
    }
}
```
      Manager Fertilise at sowing
        Crop = [Wheat]
        FertiliserType = UreaN
        Amount = 160
```csharp
using Models.Soils;
using System.Linq;
using System;
using Models.Core;
using Models.PMF;
namespace Models
{
    [Serializable]
    public class Script : Model
    {
        [Link] Clock Clock;
        [Link] Fertiliser Fertiliser;
        [Link] Summary Summary;

        [Description("Crop to be fertilised")]
        public IPlant Crop { get; set; }

        [Description("Type of fertiliser to apply? ")] [Display(Type = DisplayType.FertiliserType)]public string FertiliserType { get; set; }

    
        [Description("Amount of fertiliser to be applied (kg/ha)")]
        public double Amount { get; set; }
        
        [EventSubscribe("Sowing")]
        private void OnSowing(object sender, EventArgs e)
        {
            Model crop = sender as Model;
            if (Crop != null && crop.Name.ToLower() == (Crop as IModel).Name.ToLower())
            {
                Summary.WriteMessage(this, "Sowing fertilsier", MessageType.Diagnostic);
                Fertiliser.Apply(amount: Amount, type: FertiliserType);
            }
        }
        
    }
}
```
      Manager Harvest
```csharp
using Models.Soils.Nutrients;
using System;
using System.Linq;
using Models.Core;
using Models.PMF;
using Models.Soils;
using Models.Soils.Nutrients;
using Models.Utilities;
using APSIM.Shared.Utilities;

namespace Models
{
    [Serializable]
    public class Script : Model
    {
        [Link(ByName = true)] Plant Wheat;

        [EventSubscribe("DoManagement")]
        private void OnDoManagement(object sender, EventArgs e)
        {
            if (Wheat.IsReadyForHarvesting)
            {
               Wheat.Harvest();
               Wheat.EndCrop();    
            }
        
        }
        
    }
}
```
      Manager AutoIrrig
        AutoIrrigationOn = True
        FASWThreshold = 0.75
        FASWDepth = 600
```csharp
using APSIM.Numerics;
using APSIM.Shared.Utilities;
using System.Xml.Serialization;
using Models;
using Models.PMF;
using Models.Soils;
using System.Text;
using System.Collections.Generic;
using Models.Core;
using System.Linq;
using System;
using Models.Interfaces;

namespace Models
{
    [Serializable] 
    public class Script : Model
    {
        [Link] private Zone zone;
        [Link] private Irrigation irrigation;
        [Link] private Soil soil;
        [Link]
        private IPhysical soilPhysical;
        [Link]
        private ISoilWater waterBalance;
        public double FASW { get; set; }
        public double WaterDeficit  { get; set; }
    
        
        [Description("Auto irrigation on?")]
        public bool AutoIrrigationOn { get; set; }

        [Description("Threshold fraction available water (0-1)")]
        public double FASWThreshold { get; set; }

        [Description("Soil depth (mm) to which fraction available water is calculated")]
        public double FASWDepth { get; set; }

        [EventSubscribe("DoManagement")]
        private void OnDoManagement(object sender, EventArgs e)
        {
            CalculateFASW();
            if (AutoIrrigationOn)
            {
                if (FASW < FASWThreshold)
                {
                    double amount = 10;
                    irrigation.Apply(WaterDeficit, depth: 0);
                }
            }
        }
        
        private void CalculateFASW()
        {
            double[] LL15 = MathUtilities.Multiply(soilPhysical.LL15, soilPhysical.Thickness);
            double[] DUL = MathUtilities.Multiply(soilPhysical.DUL, soilPhysical.Thickness);
        
            int nlayr = GetLayerIndex();
            double cumdep = MathUtilities.Sum(soilPhysical.Thickness, 0, nlayr, 0.0);

            double excess_fr = MathUtilities.Divide((cumdep - FASWDepth), soilPhysical.Thickness[nlayr], 0.0);

            // note that results may be strange if swdep < ll15
            double avail_sw = (MathUtilities.Sum(waterBalance.SWmm, 0, nlayr, 0.0)
                              - excess_fr * waterBalance.SWmm[nlayr])
                              - (MathUtilities.Sum(LL15, 0, nlayr, 0.0)
                              - excess_fr * LL15[nlayr]);


            double pot_avail_sw = (MathUtilities.Sum(DUL, 0, nlayr, 0.0)
                                  - excess_fr * DUL[nlayr])
                                  - (MathUtilities.Sum(LL15, 0, nlayr, 0.0)
                                  - excess_fr * LL15[nlayr]);

            FASW = MathUtilities.Divide(avail_sw, pot_avail_sw, 0.0);
            WaterDeficit = MathUtilities.Constrain(pot_avail_sw - avail_sw, 0.0, 100000);
        }

        private int GetLayerIndex()
        {
            double[] cumThickness = soilPhysical.ThicknessCumulative;
            for (int i = 1; i < cumThickness.Length; i++)
            {
                if (FASWDepth < cumThickness[i])
                    return i - 1;
            }
            
            return cumThickness.Length - 1;
        }

    }
}
```
      Manager ReportHelper
        ReportEveryYear_Name = [ReportOnSpecificDaysEveryYear]
        ReportEveryYear_Dates = 21-mar, 23-nov, 11-aug
        ReportSpecificDates_Name = [ReportOnSpecificDates]
        ReportSpecificDates_Dates = 03/27/1980 00:00:00, 08/15/1981 00:00:00
```csharp
using APSIM.Core;
using System.Linq;
using System;
using Models.Core;
using System.Collections.Generic;
using System.Text;
using Models.Soils;
using Models.PMF;
using Models;
using System.Xml.Serialization;
using APSIM.Shared.Utilities;

namespace Models
{
    [Serializable]
    public class Script : Model, IStructureDependency
    {
        [Link] private Clock clock;
        [Link] private Zone zone;
        [Link] private Summary summary;
        public IStructure Structure { private get; set; }
        
        

        [Separator("NOTE - all dates or date strings are entered with comma-separation and no spaces")]
        [Separator("NOTE - this component should be at the bottom of the list of Managers")]
        [Separator("   ")]
        [Separator("Example for reporting in particular days but the same days every year")]

        //ReportOnSpecificDaysEveryYear
        [Description("Name of the Report model for reporting on below dates every year: ")] 
        [Display(Type=DisplayType.Model, ModelType = typeof(Report))]
        public Report ReportEveryYear_Name { get; set; } 

        [Description("Enter one or more dates (as dd-mmm) for reporting : ")] 
        public string[] ReportEveryYear_Dates { get; set; } 

        [Separator("Example for reporting on absolute dates")]

        [Description("Name of the Report model for reporting on completely specified dates: ")] 
        [Display(Type=DisplayType.Model, ModelType = typeof(Report))]
        public Report ReportSpecificDates_Name { get; set; } 

        [Description("Enter one or more dates (as dd-mmm-yyyy) for reporting : ")] 
        public DateTime[] ReportSpecificDates_Dates { get; set; } 



        [EventSubscribe("DoManagementCalculations")]
        private void OnDoManagement(object sender, EventArgs e)
        {

            // example for reporting on irregular dates but the same dates every year
            if (ReportEveryYear_Dates != null)
                foreach (string ddMMM in ReportEveryYear_Dates)
                    if (DateUtilities.DatesEqual(ddMMM, clock.Today))
                        ReportEveryYear_Name.DoOutput();

            // example for reporting on fully-specified dates that are not necessarily the same dates every year
            if (ReportSpecificDates_Dates != null)
                foreach (DateTime ddMMMyy in ReportSpecificDates_Dates)
                    if (DateUtilities.Equals(ddMMMyy, clock.Today))
                        ReportSpecificDates_Name.DoOutput();




            /*if (ReportSpecificDates_Dates != null)
            {
                foreach (DateTime ddMMMyy in ReportSpecificDates_Dates)
                {
                    if (DateUtilities.Equals(ddMMMyy, clock.Today))
                    {
                        Models.Report myReport =  Structure.Find<IModel>(ReportSpecificDates_Name, relativeTo: (INodeModel)zone) as Models.Report;
                        if (myReport == null)
                            throw new Exception(string.Format("Unable to locate report {0}.", ReportSpecificDates_Name));
                        myReport.DoOutput();
                    }
                }
            }*/

        }
        
    }
}
```
      Fertiliser
      Irrigation
      MicroClimate: a_interception=0; b_interception=1; c_interception=0; d_interception=0; SoilHeatFluxFraction=0.4; MinimumHeightDiffForNewLayer=0; NightInterceptionFraction=0.5; ReferenceHeight=2
      Plant Wheat
      SurfaceOrganicMatter: InitialResidueName=wheat_stubble; InitialResidueType=wheat; InitialResidueMass=500; InitialStandingFraction=0; InitialCPR=0; InitialCNR=100
      Soil: ASCOrder=Vertosol; ASCSubOrder=Black; SoilType=Clay; Site=Norwin; NearestTown=Norwin; Region=Darling Downs and Granite Belt; State=Queensland; Country=Australia; NaturalVegetation=Qld. Bluegrass, possible Qld. Blue gum; ApsoilNumber=900; Latitude=-27.581836; Longitude=151.320206; LocationAccuracy=+/- 20m
        DataSource=CSIRO Sustainable Ecosystems, Toowoomba; Characteriesd as part of the GRDC funded project"Doing it better, doing it smarter, managing soil water in Australian agriculture' 2011
        Comments=OC, CLL for all crops estimated-based on Bongeen Mywybilla Soil No1
        Physical
          Thickness  ParticleSizeSand  ParticleSizeSilt  ParticleSizeClay  Rocks  BD       AirDry    LL15      DUL       SAT       KS
          150        5                 65                30                0      1.01056  0.13025   0.2605    0.521     0.588655  20
          150        5                 65                30                0      1.07146  0.198689  0.248362  0.496723  0.565677  20
          300        5                 65                30                0      1.09394  0.28      0.28      0.488438  0.557193  20
          300        5                 65                30                0      1.15861  0.28      0.28      0.480297  0.532787  20
          300        5                 65                30                0      1.17301  0.28      0.28      0.471584  0.527354  20
          300        5                 65                30                0      1.16287  0.28      0.28      0.457071  0.53118   20
          300        5                 65                30                0      1.1875   0.28      0.28      0.452332  0.521888  20
          Rocks, ParticleSizeSand, ParticleSizeSilt, ParticleSizeClay source: Calculated
          SoilCrop WheatSoil: LL=[0.261, 0.248, 0.28, 0.306, 0.36, 0.392, 0.446]; KL=[0.06, 0.06, 0.06, 0.04, 0.04, 0.02, 0.01]; XF=[1, 1, 1, 1, 1, 1, 1]
        WaterBalance SoilWater: SummerDate=1-Nov; SummerU=5; SummerCona=5; WinterDate=1-Apr; WinterU=5; WinterCona=5; DiffusConst=40; DiffusSlope=16; Salb=0.12; CN2Bare=73; CNRed=20; CNCov=0.8; PSIDul=-100; Thickness=[150, 150, 300, 300, 300, 300, 300]; SWCON=[0.3, 0.3, 0.3, 0.3, 0.3, 0.3, 0.3]
        Organic: FOMCNRatio=40; CarbonUnits=Total
          Thickness  Carbon  SoilCNRatio  FBiom  FInert  FOM
          150        1.2     12           0.04   0.4     347.129
          150        0.96    12           0.02   0.6     270.344
          300        0.6     12           0.02   0.8     163.972
          300        0.3     12           0.02   1       99.4541
          300        0.18    12           0.01   1       60.322
          300        0.12    12           0.01   1       36.5871
          300        0.12    12           0.01   1       22.1912
        Chemical: PHUnits=Water
          Thickness  PH  CEC
          150        8   11.045
          150        8   10.505
          300        8   9.695
          300        8   9.02
          300        8   8.75
          300        8   8.615
          300        8   8.615
          CEC source: Calculated
        Water: Thickness=[150, 150, 300, 300, 300, 300, 300]; FilledFromTop=false
          InitialValues=[0.521, 0.496723, 0.488438, 0.480297, 0.471584, 0.457071, 0.452332]
        Nutrient
        Solute NO3: Thickness=[150, 150, 300, 300, 300, 300, 300]; InitialValues=[1, 1, 1, 1, 1, 1, 1]; InitialValuesUnits=ppm; WaterTableConcentration=0; D0=0; DepthConstant=0; MaxDepthSoluteAccessible=0; RunoffEffectivenessAtMovingSolute=0; MaxEffectiveRunoff=0
        Solute NH4: Thickness=[150, 150, 300, 300, 300, 300, 300]; InitialValues=[0.1, 0.1, 0.1, 0.1, 0.1, 0.1, 0.1]; InitialValuesUnits=ppm; WaterTableConcentration=0; D0=0; DepthConstant=0; MaxDepthSoluteAccessible=0; RunoffEffectivenessAtMovingSolute=0; MaxEffectiveRunoff=0
        Solute Urea: Thickness=[150, 150, 300, 300, 300, 300, 300]; InitialValues=[0, 0, 0, 0, 0, 0, 0]; InitialValuesUnits=kg/ha; WaterTableConcentration=0; D0=0; DepthConstant=0; MaxDepthSoluteAccessible=0; RunoffEffectivenessAtMovingSolute=0; MaxEffectiveRunoff=0
        SoilTemperature Temperature
      Report ReportSimple: EventNames=[Clock].EndOfDay
        VariableNames:
          [Clock].Today
          [Weather].Rain as DailyRainfall
          [Wheat].Grain.Total.Wt
          [Sowing].Script.SowingDepth
          [Weather].MaxT as MaxT
          Min of [Weather].MaxT from [ReportSimple].DayAfterLastOutput to [Clock].Today as TestMaxT
      Report ReportOnEvents
        VariableNames:
          [Clock].Today
          [Wheat].AboveGroundLive.Wt
          Sum([Soil].Nutrient.MineralN)
          [Wheat].Phenology.CurrentPhase.Name
          [Irrigation].IrrigationApplied
          [Fertiliser].NitrogenApplied
        EventNames:
          [Wheat].Sowing
          [Wheat].Flowering
          [Wheat].Harvesting
          [Wheat].Phenology.PhaseChanged
          [Irrigation].Irrigated
          [Fertiliser].Fertilised
      Report ReportOnSpecificDaysEveryYear
        VariableNames:
          [Clock].Today
          [Wheat].AboveGroundLive.Wt
      Report ReportOnSpecificDates
        VariableNames:
          [Clock].Today
          [Wheat].AboveGroundLive.Wt
      Report ReportArrays: EventNames=[Clock].EndOfDay
        VariableNames:
          [Clock].Today
          Sum([Soil].Physical.Thickness[1:3]) as DepthToBottomOfLayer3
          Sum([Soil].Water.MM) as TotalWaterStored
          Sum([Soil].Water.MM[1:2]) as WaterStoredTop2Layers
          Sum([Soil].Water.MM[1:3]) as WaterStoredTop3Layers
          Sum([Soil].Water.MM[4:]) as WaterStoredLayer4AndBelow
          Sum([Soil].Water.MM[:6]) as WaterStoredDowntoLayer6
          Mean([Soil].NO3.ppm[1:4]) as MeanNO3ppmTop4Layers
          Min([Soil].NO3.ppm[1:4]) as MinNO3ppmTop4Layers
          Max([Soil].NO3.ppm[1:4]) as MaxNO3ppmTop4Layers
          Sum([Soil].Urea.kgha[1:3] + [Soil].NH4.kgha[1:3] + [Soil].NO3.kgha[1:3]) as MineralN
          Sum([Soil].Urea.kgha[1:3] + [Soil].NH4.kgha[1:3] + [Soil].NO3.kgha[1:3]) * 1000 / Sum([Soil].Physical.Thickness[1:3] ) as KgMinN_PerSoilMeter
      Report ReportArraysUsingDepths: EventNames=[Clock].EndOfDay
        VariableNames:
          [Clock].Today
          // reporting water stored over a range of depths
          Sum([Soil].Water.MM[1:3]) as WaterToBottomOfLayer3
          [Soil].Water.MM[0mm:600mm] as WaterTo600mm
          [Soil].Water.MM[0mm:500mm] as WaterTo500mm
          [Soil].Water.MM[0mm:400mm] as WaterTo400mm
          [Soil].Water.MM[0mm:300mm] as WaterTo300mm
          // reporting volumentric water content at a depth
          [Soil].Water.Volumetric[700mm] as WaterVolAt700mm
          [Soil].Water.Volumetric[599mm] as WaterVolAt600mm
          [Soil].Water.Volumetric[450mm] as WaterVolAt450mm
          [Soil].Water.Volumetric[300mm] as WaterVolAt300mm
          [Soil].Water.Volumetric[200mm] as WaterVolAt200mm
          [Soil].Water.Volumetric[100mm] as WaterVolAt100mm
      Report ReportDaily: EventNames=[Clock].EndOfDay
        VariableNames:
          [Clock].Today
          Sum of [Weather].MaxT from [ReportDaily].DayAfterLastOutput to [Clock].Today as SumDailyMaxT
          Mean of [Weather].MaxT from [ReportDaily].DayAfterLastOutput to [Clock].Today as MeanDailyMaxT
          Min of [Weather].MaxT from [ReportDaily].DayAfterLastOutput to [Clock].Today as MinDailyMaxT
          Max of [Weather].MaxT from [ReportDaily].DayAfterLastOutput to [Clock].Today as MaxDailyMaxT
          First of [Weather].MaxT from [ReportDaily].DayAfterLastOutput to [Clock].Today as FirstDailyMaxT
          Last of [Weather].MaxT from [ReportDaily].DayAfterLastOutput to [Clock].Today as LastDailyMaxT
          Diff of [Weather].MaxT from [ReportDaily].DayAfterLastOutput to [Clock].Today as DiffDailyMaxT
      Report ReportWeekly: EventNames=[Clock].EndOfWeek
        VariableNames:
          [Clock].Today
          Sum of [Weather].MaxT from [ReportWeekly].DayAfterLastOutput to [Clock].Today as SumWeeklyMaxT
          Mean of [Weather].MaxT from [ReportWeekly].DayAfterLastOutput to [Clock].Today as MeanWeeklyMaxT
          Min of [Weather].MaxT from [ReportWeekly].DayAfterLastOutput to [Clock].Today as MinWeeklyMaxT
          Max of [Weather].MaxT from [ReportWeekly].DayAfterLastOutput to [Clock].Today as MaxWeeklyMaxT
          First of [Weather].MaxT from [ReportWeekly].DayAfterLastOutput to [Clock].Today as FirstWeeklyMaxT
          Last of [Weather].MaxT from [ReportWeekly].DayAfterLastOutput to [Clock].Today as LastWeeklyMaxT
          Diff of [Weather].MaxT from [ReportWeekly].DayAfterLastOutput to [Clock].Today as DiffWeeklyMaxT
      Report ReportMonthly: EventNames=[Clock].EndOfMonth
        VariableNames:
          [Clock].Today
          Sum of [Weather].MaxT from [ReportMonthly].DayAfterLastOutput to [Clock].Today as SumMonthlyMaxT
          Mean of [Weather].MaxT from [ReportMonthly].DayAfterLastOutput to [Clock].Today as MeanMonthlyMaxT
          Min of [Weather].MaxT from [ReportMonthly].DayAfterLastOutput to [Clock].Today as MinMonthlyMaxT
          Max of [Weather].MaxT from [ReportMonthly].DayAfterLastOutput to [Clock].Today as MaxMonthlyMaxT
          First of [Weather].MaxT from [ReportMonthly].DayAfterLastOutput to [Clock].Today as FirstMonthlyMaxT
          Last of [Weather].MaxT from [ReportMonthly].DayAfterLastOutput to [Clock].Today as LastMonthlyMaxT
          Diff of [Weather].MaxT from [ReportMonthly].DayAfterLastOutput to [Clock].Today as DiffMonthlyMaxT
      Report ReportYearly: EventNames=[Clock].EndOfYear
        VariableNames:
          [Clock].Today
          Sum of [Weather].MaxT from [ReportYearly].DayAfterLastOutput to [Clock].Today as SumYearlyMaxT
          Mean of [Weather].MaxT from [ReportYearly].DayAfterLastOutput to [Clock].Today as MeanYearlyMaxT
          Min of [Weather].MaxT from [ReportYearly].DayAfterLastOutput to [Clock].Today as MinYearlyMaxT
          Max of [Weather].MaxT from [ReportYearly].DayAfterLastOutput to [Clock].Today as MaxYearlyMaxT
          First of [Weather].MaxT from [ReportYearly].DayAfterLastOutput to [Clock].Today as FirstYearlyMaxT
          Last of [Weather].MaxT from [ReportYearly].DayAfterLastOutput to [Clock].Today as LastYearlyMaxT
          Diff of [Weather].MaxT from [ReportYearly].DayAfterLastOutput to [Clock].Today as DiffYearlyMaxT
      Report ReportSimulation: EventNames=[Clock].EndOfSimulation
        VariableNames:
          [Clock].Today
          Sum of [Weather].MaxT from [ReportSimulation].DayAfterLastOutput to [Clock].Today as SumSimulationMaxT
          Mean of [Weather].MaxT from [ReportSimulation].DayAfterLastOutput to [Clock].Today as MeanSimulationMaxT
          Min of [Weather].MaxT from [ReportSimulation].DayAfterLastOutput to [Clock].Today as MinSimulationMaxT
          Max of [Weather].MaxT from [ReportSimulation].DayAfterLastOutput to [Clock].Today as MaxSimulationMaxT
          First of [Weather].MaxT from [ReportSimulation].DayAfterLastOutput to [Clock].Today as FirstSimulationMaxT
          Last of [Weather].MaxT from [ReportSimulation].DayAfterLastOutput to [Clock].Today as LastSimulationMaxT
          Diff of [Weather].MaxT from [ReportSimulation].DayAfterLastOutput to [Clock].Today as DiffSimulationMaxT
  Folder Reporting Basics
    Memo Reporting Basics
      Setting up outputs from a simulation requires describing **what** to output and **when** that should be done.

      ## Properties - setting up what should be reported

      Figure 1 shows a screen capture of a simple report. The upper box (Properties) holds descriptions of what should be reported. The general syntax is:

      			[Model].Variable
      The first part, "[Model]" just above, gives the name of a model in the simulation. Models are almost any component in the simulation - e.g. Clock, Weather, Wheat, Irrigation - including Manager scripts (although these are a slightly special case and more on that below). The name of the model must be in square brackets. As with Manager scripts, Properties uses Intellisense to assist with constructing the output descriptors. For example, see row 1 of Figure 1. After typing "[Clock]" once a "." is typed a drop-down list of possible variables will appear as hints and in Figure 1 the choice from the list was "Today" which gives the date of the simulation output.

      *Note that model and variable names are case-sensitive. Capitalisation in the right places is important.*

      The component "ReportSimple" shows four output examples (see also below). The second row (see also below) shows an example of relabelling the output (the "as DairyRainfall" text) - this simply allows the user to give a more relevant label for the output in the output file.

      			[Weather].Rain as DailyRainfall

      The third row shows that it may be necessary to work through several layers to get to the output wanted. In each case a "." after the variable name gives a list with hints for outputs.

      			[Wheat].Grain.Total.Wt

      The fourth row (also below) shows the special case of reporting an output from a Manager script. The first part ("[SowingRule]") is the name of the Manager script (so the output text needs to say current with any name changes you might make). Outputs from Managers always need a ".Script" before Intellisense will show the possible outputs.

      			[SowingRule].Script.SowingDepth

      ## Reporting frequency - setting up when reports should happen

      Also needed is a specification of *when* an output should be made. The instruction for when to report is in the form of:

      			[Model].Event or Date(s)
      ### Event
      An Event is something that happens, like a stage of the day or a management action. The most-used example of a reporting frequency is:

      			[Clock].EndOfDay
      and this creates an output for every "EndOfDay" event - "EndOfDay" is an event created by Clock every day after all the models have done their calculations. Any (almost) event can be used to control the frequency of reporting such as:

      			[Wheat].Sowing
      			[Wheat].Flowering
      			[Wheat].Harvesting
      			[Wheat].PlantEnding
      			[Irrigation].Irrigated
      			[Fertiliser].Fertilised
      where “Wheat” might be any crop. This also shows that multiple triggers for reporting can be used.

      It is worth noting that when an event is used to trigger reporting, the output happens immediately rather than at the end of the simulation day. If you are getting strange outputs then consider this as a possible reason. To understand more about what order models do their calculations see https://apsimnextgeneration.netlify.app/development/.

      ### Dates

      In addition to specifying events, you can also specify one or more dates in the frequency window. Dates can be specified one per line at be in either dd-mmm or dd-mmm-yyyy form e.g.

      		1-jul
      		1-jul-1980

      Note that there can be a mixture of events and dates.

      ### Conditional reporting

      Instead of specifying event names or a list of dates, you can specify a conditional function that when evaluated to true will cause a line of output to be written to the report table. For example:

      		Clock.Today >= new DateTime(2011, 2, 21)

      will do daily outputs after the 21st February 2011. Conditional functions always start with the if keyword. They are written in C# (like a manager script) and need to be wholely contained on a single line. Multiple conditional statments can be specified - one per line. Another example:

      		Clock.Today >= new DateTime(2011, 2, 21) && Clock.Today <= new DateTime(2011, 12, 31)

      This will do daily outputs between 21st February 2011 and the end of 2011.

      ## Reporting at irregular intervals or specific dates

      If reporting is needed for particular days (e.g. to compare against measurements in an experiment) a combination of a Manager and a Report component will do the trick. An example of such a Manager (**ReportHelper**) and two Report components (**ReportOnSpecificDaysEveryYear** and **ReportOnSpecificDates**) are included in this example. Note that when using a Manager to control reporting, the Report frequency in the Report component should be left blank.

      [Note that an Operations component could also be used to trigger irregular reporting dates.]
  Folder Dealing with outputs that have layers
    Memo Reporting Arrays
      Several of the outputs from APSIM are arrays - water content in the soil layers is a good example of this - and there are some features that make reporting arrays easier in APSIM.

      To report all elements of an array, the syntax is the same as reporting a single variable. See for example in Row 2 of "ReportArrays the text

      			[Soil].SoilWater.SWmm
      produces one column of output for each element (soil layer) in the array. When a particular layer is wanted then specify that in square brackets so the "[1]" is the top (closest to the soil surface) layer. For example,

      			[Soil].SoilWater.SWmm[1] as TopLayerWater_mm

      More often some sort of aggregation is in the array is wanted and for this it is necessary to specify both which elements of the array are to be aggregated and what type of aggregation is wanted.

      There are four options for specifying how the array elements should be aggregated - Sum, Mean, Min and Max - the meaning of these is self-evident. These are applied to the array as, for example Mean(x) where the x is the output to be averaged. Use round brackets, capitalise the aggregation type and no spaces.

      For specifying how the aggregation is to work there are several options. Giving no layer information at all includes all of the array. A range is specified as, for example [3:6] for the third to sixth (inclusive, here meaning four layers) layers. Giving the colon but no numerical value means from the first (e.g. [:5]) or to the last (e.g. [2:]) elements. Report will not indicate the depth of the layers but the user can either get this information from the Soil input or can output the data using [Soil].Thickness which is an array giving the thickness of each layer in mm.

      Some examples of possible array outputs to show the syntax are:

      			Sum([Soil].Thickness[1:3]) as DepthToBottomOfLayer3
      			Sum([Soil].SoilWater.SWmm) as TotalWaterStored
      			Sum([Soil].SoilWater.SWmm[1:2]) as WaterStoredTop2Layers
      			Sum([Soil].SoilWater.SWmm[1:3]) as WaterStoredTop3Layers
      			Sum([Soil].SoilWater.SWmm[4:]) as WaterStoredLayer4AndBelow
      			Sum([Soil].SoilWater.SWmm[:6]) as WaterStoredDowntoLayer6
      			Mean([Soil].Nutrient.NO3.ppm[1:4]) as MeanNO3ppmTop4Layers
      			Min([Soil].Nutrient.NO3.ppm[1:4]) as MinNO3ppmTop4Layers
      			Max([Soil].Nutrient.NO3.ppm[1:4]) as MaxNO3ppmTop4Layers

      Simple, element-by-element, array operations can be included in the specification. For example

      			[Soil].Nutrient.Urea.kgha + [Soil].Nutrient.NH4.kgha + [Soil].Nutrient.NO3.kgha
      will produce one column of data for each soil layer with the total of the amount of N as Urea, NH4 and NO3. Inserting

      			Sum([Soil].Nutrient.Urea.kgha[1:3] + [Soil].Nutrient.NH4.kgha[1:3] + [Soil].Nutrient.NO3.kgha[1:3]) as MineralN
      will give a single column of data with the total of Urea-N, NH4-N and NO3-N dfrom the surface the the bottom of the third layer. These expressions can get more complex as in:

      			Sum([Soil].Nutrient.Urea.kgha[1:3] + [Soil].Nutrient.NH4.kgha[1:3] + [Soil].Nutrient.NO3.kgha[1:3]) * 1000 / Sum([Soil].Thickness[1:3] ) as KgMinN_PerSoilMeter
      which would give a single (somewhat nonsensical) output of the accumulation in mineral N with depth in the soil.
  Folder A better way of reporting with layers
    Memo Reporting Arrays Using Depths
      Outputs that are arrays in APSIM are usually representing depths in soil. The syntax for reporting shown in the previous section relies on knowing what depth each layer (and therefore array element) represents. This can be irritating and is difficult when wanting a single report to cover multiple different soils that may well have different layering.

      Reporting using depths rather than array elements is a solution to this. There are two variants. Using:

      		[Soil].Water.Volumetric[150mm]

      will report the volumetric water content of the layer that encompasses 150 mm deep. Any depth can be specified, it must be in millimetres in the syntax as above, and any output variable can be reported.

      There are some caveats when a depth is specified that coincides with the interface between two layers. Here the rules are:
      - 0mm will specify the top layer of the soil
      - a value within 0.1 mm of a layer interface will specify the layer above the interface
      - a value below the rootzone will result in an error.

      The second syntax is:

      		[Soil].Water.MM[150mm:450mm]

      where the “:” indicates that a sum of the array elements should be made. The method will sensibly take account of parts of layers. Any output can be specified so it is up to the user to only ask for sums of sensible variables (e.g., not volumetric water content or soil temperature).
  Folder Reporting at Intervals Beyond Every Day
    Memo Reporting that is Aggregated in Time
      ***Note well** – reporting at aggregations other than every day can become complex. It is recommended that the results be critically evaluated to ensure that the reporting specified is as intended.*

      APSIM allows reporting at various intervals. Several of these methods have been described above. In addition to the usual [Clock].EndOfDay for daily reporting, [Clock] also has events of EndOfWeek, EndOfMonth, EndOfYear and EndOfSimulation. When the reporting is not every day then it is necessary to consider what the aggregation of the output should be. Some variables would usually be reported as their value on the day – many state variables (e.g. plant biomass) are like this. Others are almost always wanted to be summed over the interval since the last report – drainage and evaporation are good examples here.

      APSIM provides several ways to construct the aggregations. Not all the aggregations will be sensible for all outputs and it is up to the user to ensure the sensibility of the instructions to Report. For example, it makes no physical sense to sum the biomass of a plant in a monthly aggregation. It would make sense to report the value at the end of the month or to report the increase (difference) in biomass from the start to the end and it might make sense to report an average biomass. These issues must be considered when constructing more complex Report specifications. The general syntax of aggregated reporting is:

      			AggregationType of [Model].Variable from Start to End as Label

      The new elements here are *AggregationType*, *Start* and *End*.

      ## AggregationType
      AggregationType can be any of:

      -	Sum of

      -	Mean of

      -	Min of

      -	Max of

      -	First of

      -	Last of

      -	Diff of

      Most of these are self-evident. First and Last are chronological values. Diff is the increase in the output variable over the reporting interval – if the variable decreases then it will have a negative value.

      ## Start
      The most useful form of *Start* is *[ReportName].DateOfLastOutput* where the first part is the name of the current Report component. *DateOfLastOutput* is pretty much as stated. Other *Start* constructs might be a general, e.g. *1-jan*, or specific, e.g. *1-jan-1982*, date. *Start* can also be an event, e.g. *[Wheat].sowing* or *[Clock].StartOfYear*. When *Start* is a Clock or Report event the aggregation always starts at the start of the day. For events created by crop or other models the event can happen at any point of the day and it is not always clear without careful examination if the current-day calculations and updates will be included or excluded. This is user-beware.

      ## End
      *[Clock].Today* is the most useful *End* specification. This means that the end of the aggregation will be controlled by the Report frequency. *End* can also be an event, e.g. *[Wheat].Harvesting* or a general or specific date. As with *Start* and events, treat these with caution. Always consider the interaction between the aggregation interval and the report frequency. For example if the report frequency is *[Clock].EndOfMonth*:

      			Sum of [Weather].Rain from [Report].DateOfLastOutput to [Clock].Today
      will produce a monthly rainfall total while

      			Sum of [Weather].Rain from 1-jan to [Clock].Today
      will produce a cumulative rainfall as the months of the year progress and the accumulation will reset again on the next 1-Jan.

      ## Some examples
      The figures below show some aggregation examples of daily, weekly, monthly and annual aggregation reporting maximum temperature in various ways. Note that an aggregation to the end of the simulation is also possible. See the accompanying example *Report.apsimx* for details of these aggregations.
  Folder More Reporting Examples
    Folder Perennial Crop Example
      Memo
        The simulation in this section (titled "Annual Reporting In June") is a multi-year pasture cutting trial simulation. The Report components provide some examples of ways to get useful outputs from a simulation. See the generated documentation but also look at the output specifications in the Reports components.

        Note that in the documentation, many of the output specifications are broken over two or more lines. This is only to show then text in the generated PDF. In a Report component, all the text would be on a single line.
      Simulation Annual Reporting In June
        Clock: Start=1980-07-01; End=1989-06-30
        Weather: FileName=%root%/Examples/WeatherFiles/NZ_Lincoln
        SoilArbitrator
        Summary
        Zone Field: Area=1; Slope=0; AspectAngle=0; Altitude=50
          Manager CutRotation
            AllowControl = yes
            CutRotationStartDate = 01/01/1900 00:00:00
            CutRotationEndDate = 12/31/2100 00:00:00
            IntervalType = FixedInterval
            CutInterval = 21
            DurationOfCut = 1
            RemoveAmountType = ResidualDM
            AmountGiven = 1000
            DMRemoveType = BasedOnDigestibility
            FractionN2Remove = 0.75
            ReturnType = AsDungUrine
            NDungType = DefineProportion
            ProportionN2Dung = 0.4
            CNRatioDung = 0
            UrineDepth = 250
```csharp
// Defoliates AgPasture on a regular rotation or one-off via a schedule
// currenty defoliates the amount specified by spreading evenly over the specified period

using Newtonsoft.Json;
using System.Linq;
using Models.Interfaces;
using APSIM.Shared.Utilities;
using Models.Soils;
using Models.PMF;
using Models.Core;
using System.Xml.Serialization;
using System.Collections.Generic;
using System;
using Models.Soils.Nutrients;

namespace Models
{
    [Serializable]
    public class Script : Model
    {
        [Link] private Zone myZone;
        [Link] private Clock Clock;
        [Link] private Fertiliser fertiliser;
        [Link(ByName = true)] private ISolute no3;
        [Link] private Soil mySoil;
        [Link] private ISummary summary;
        private double existingDM;
        private double herbageToRemove;
        private string amountType;
        private int nLayers;
        public  event BiomassRemovedDelegate BiomassRemoved;
        private double atZ0;
        private double atZ1;
        [Link]
        private IPhysical soilPhysical;
        // - Links to APSIM models
        
        List<AgPasture.PastureSpecies> Pasture = new List<AgPasture.PastureSpecies>();
        
        // - Paramters for this manager
        [Description("Allow this manager to control defoliation? ")]
        public yesnoType AllowControl { get; set; }
        [Description("Date to begin the rotation: ")]
        public DateTime CutRotationStartDate { get; set; }
        [Description("Date to finish the rotation: ")]
        public DateTime CutRotationEndDate { get; set; }
        [Description("How the interval is defined: ")]
        public rotationIntervalTypes IntervalType { get; set; }
        [Description("Rotation interval (days): ")]
        public int CutInterval { get; set; }
        [Description("Duration of each event (days): ")]
        public int DurationOfCut { get; set; }
        [Description("What amount is being defined: ")]
        public removeAmountTypes RemoveAmountType { get; set; }
        [Description("Amount to use (kg/ha): ")]
        public double AmountGiven { get; set; }
        [Description("How much of DM is removed from the field: ")]
        public removeDMTypes DMRemoveType { get; set; }
        [Description("Fraction of N that is removed from the field (0-1): ")]
        public double FractionN2Remove { get; set; }
        [Description("How defoliated material is returned to the field? ")]
        public returnTypes ReturnType { get; set; }
        [Description("How the partition of N to dung and urine are defined:")]
        public dungNContentTypes NDungType { get; set; }
        [Description("Proportion of returned N that goes to dung (0-1): ")]
        public double ProportionN2Dung { get; set; }
        [Description("The C:N of dung (typically around 20): ")]
        public double CNRatioDung { get; set; }
        [Description("Depth down to which urine is applied (mm): ")]
        public double UrineDepth { get; set; }

        // - Outputs from this manager
        [JsonIgnore][Units("g/m2")]// Description: Pasture DM defoliated today
        public double DefoliatedWt { get; set; }
        [JsonIgnore][Units("g/m2")]// Description: Pasture N defoliate today
        public double DefoliatedN { get; set; }
        [JsonIgnore][Units("g/m2")]// Description: Pasture DM harvested today
        public double HarvestedWt { get; set; }
        [JsonIgnore][Units("g/m2")]// Description: Pasture N harvested today
        public double HarvestedN { get; set; }
        [JsonIgnore][Units("g/m2")]// Description: Pasture DM removed from the field
        public double RemovedWt { get; set; }
        [JsonIgnore][Units("g/m2")]// Description: Pasture N removed from the field
        public double RemovedN { get; set; }
        [JsonIgnore][Units("g/m2")]// Description: Residue DM returned to the field
        public double ReturnedWt { get; set; }
        [JsonIgnore][Units("g/m2")]// Description: Residue N returned to the field
        public double ReturnedN { get; set; }
        [JsonIgnore][Units("g/m2")]// Description: Harvested N returned as dung (SurfaceOM)
        public double NReturnedInDung { get; set; }
        [JsonIgnore][Units("g/m2")]// Description: Harvested N returned as urine (urea)
        public double NReturnedInUrine { get; set; }
        [JsonIgnore][Units("day")]// Description: Number of days after last defoliation
        public int DaysAfterCut { get; set; }
        [JsonIgnore][Units("g/m2")]// Description: Total standing DM (Leaf + Stem/Sheath) before cut
        public double PreHarvestDM { get; set; }
        [JsonIgnore][Units("g/m2")]// Description: Total standing DM (Leaf + Stem/Sheath) after cut
        public double PostHarvestDM { get; set; }
        
        // - Internal variables
        // fraction of harvested Dm to actually remove from field
        private double fractionDM2Remove = 1.0;
        // number of days for each defoliation event
        private int cuttingDuration = 0;
        // counter for day within each defoliation
        private int daysCutting = 0;
        // total existing DM harvestable
        // total herbage to remove in g/m2 per day
        // type of DM amount (ResidualDM or DMToRemove)
        // auxiliary flag for defoliation
        private bool aCutHasHappened = false;
        // fraction of urine that is applied to each layer
        private double[] fractionUrine;
        // number of layer in the soil

        // - Event to add residue or dung to surface OM

        [EventSubscribe("StartOfSimulation")]
        private void OnSimulationCommencing(object sender, EventArgs e)
        {
            foreach (AgPasture.PastureSpecies species in myZone.FindAllChildren<AgPasture.PastureSpecies>().OfType<IModel>().ToList())
                Pasture.Add(species);

            // reset variables
            DaysAfterCut = 0;
            resetVariables();
            cuttingDuration = DurationOfCut;
            
            // get the type of amount given
            if (RemoveAmountType == removeAmountTypes.ResidualDM)
                amountType = "SetResidueAmount";
            else
                amountType = "SetRemoveAmount";

            // make sure that rotation start when startDate < simulationStartDay
            if ((Clock.Today > CutRotationStartDate) && (Clock.Today < CutRotationEndDate))
                CutRotationStartDate = Clock.Today;
                
            // set the fraction of urine for each layer
            nLayers = soilPhysical.Thickness.Length;
            fractionUrine = new double[nLayers];
            double soilDepth = 0.0;
            double distFactor = 1.5;
            if (ReturnType == returnTypes.AsDungUrine)
            {
                double totalProp = UrineDepth * Math.Pow(1.0, distFactor) / (distFactor + 1.0);
                
                atZ1 = (UrineDepth - soilDepth) * Math.Pow(1.0 - soilDepth / UrineDepth, distFactor) / (distFactor + 1.0);
                for (int z = 0; z < nLayers; z++)
                {
                    atZ0 = atZ1;
                    soilDepth += soilPhysical.Thickness[z];
                    atZ1 = (UrineDepth - soilDepth) * Math.Pow(1.0 - soilDepth / UrineDepth, distFactor) / (distFactor + 1);
                    if (1.0 - (soilDepth / UrineDepth) < 0.0)
                        atZ1 = 0;
                    fractionUrine[z] = (atZ0 - atZ1) / totalProp;
                }
            }
        }
        
        [EventSubscribe("DoManagement")]
        private void OnDoManagement(object sender, EventArgs e)
        {
            // Check whether defoliation is allowed at all
            if (AllowControl == yesnoType.yes)
            {
                // Check whether defoliation can start
                if ((Clock.Today >= CutRotationStartDate) && (Clock.Today <= CutRotationEndDate))
                {
                    if (Clock.Today == CutRotationStartDate)
                        DaysAfterCut = CutInterval;
    
                    // Check whether we should start a defoliation
                    if ((Pasture[0].IsAlive) && (DaysAfterCut >= (CutInterval - 1)))
                        StartDefoliation(AmountGiven, amountType, DurationOfCut);
                }
            }
            //// Note: Only the code above should be limited by 'AllowControl'. So the rest of the code
            ////  can be used by being called from another manager or a schedulle thingy


            // Check whether we need to continue cutting
            if ((daysCutting > 0) && (daysCutting < cuttingDuration))
            {
                // reset outputs
                resetVariables();

                defoliatePasture(herbageToRemove);
                if (ReturnType == returnTypes.AsResidue)
                    returnResidues();
                else
                    returnExcreta();
                daysCutting += 1;
                if (daysCutting == cuttingDuration)
                {
                    PostHarvestDM = 0.0;
                    foreach (AgPasture.PastureSpecies species in Pasture)
                        PostHarvestDM += species.Standing.Wt;
                }
            }

            // reset outputs
            if (daysCutting < 0)
            {
                resetVariables();
                daysCutting = 0;
            }
        }

        [EventSubscribe("DoManagementCalculations")]
        private void OnDoManagementCalculations(object sender, EventArgs e)
        {
            // Check whether a cutting has finished
            if (daysCutting == cuttingDuration)
            {
                aCutHasHappened = true;
                daysCutting = -1;
            }

            // Increase the counter for days after cutting
            if (aCutHasHappened && (daysCutting == 0))
                DaysAfterCut += 1;
        }

        // Resets the values of all outputs
        private void resetVariables()
        {
            DefoliatedWt = 0.0;
            DefoliatedN = 0.0;
            HarvestedWt = 0.0;
            HarvestedN = 0.0;
            RemovedWt = 0.0;
            RemovedN = 0.0;
            ReturnedWt = 0.0;
            ReturnedN = 0.0;
            NReturnedInDung = 0.0;
            NReturnedInUrine = 0.0;
        }

        // Description: Perform the basic calculations for defoliation
        public void StartDefoliation(double amountDM, string amountType, int duration)
        {
            // Get the existing plant amount
            existingDM = 0.0;
            PreHarvestDM = 0.0;
            foreach (AgPasture.PastureSpecies species in Pasture)
            {
                PreHarvestDM += species.Standing.Wt;
                existingDM += species.Harvestable.Wt;
            }
            
            // Check the amount to remove and print some info
            if ((amountType == "SetRemoveAmount") && (existingDM >= amountDM / duration))
            {
                summary.WriteMessage(this, "   Defoliating " + (10 * amountDM).ToString("#0.0") + "kg/ha over " + duration + " days", MessageType.Diagnostic);
                herbageToRemove = amountDM / duration;
            }
            else if ((amountType == "SetResidueAmount") && (existingDM >= amountDM))
            {
                summary.WriteMessage(this, "   Defoliating down to approximately " + (10 * amountDM).ToString("#0.0") + "kg/ha over " + duration + " days", MessageType.Diagnostic);
                herbageToRemove = (PreHarvestDM - amountDM) / duration;
            }
            else
            {
                summary.WriteMessage(this, "   Defoliation will not happend because there is not enough plant material", MessageType.Diagnostic);
                if (IntervalType == rotationIntervalTypes.FixedInterval)
                    DaysAfterCut = -duration;
                return;
            }

            // Start defoliation
            cuttingDuration = duration;
            defoliatePasture(herbageToRemove);
            if (ReturnType == returnTypes.AsResidue)
                returnResidues();
            else
                returnExcreta();
                
            daysCutting = 1;
            DaysAfterCut = 0;
            if (daysCutting == cuttingDuration)
            {
                PostHarvestDM = 0.0;
                foreach (AgPasture.PastureSpecies species in Pasture)
                    PostHarvestDM += species.Standing.Wt;
            }
        }

        // Do the DM removal
        private void defoliatePasture(double removeAmount)
        {
            // Remove a proportion of required DM from each species
            DefoliatedWt = 0.0;
            DefoliatedN = 0.0;
            foreach (AgPasture.PastureSpecies species in Pasture)
            {
                double amountToRemove = removeAmount * species.Harvestable.Wt / existingDM;
                species.RemoveBiomass(amount: amountToRemove, type: "SetRemoveAmount");
                DefoliatedWt += species.HarvestedWt;
                DefoliatedN += species.HarvestedN;
            }
            
            // total harvested is equal total defoliated, for now
            HarvestedWt = DefoliatedWt;
            HarvestedN = DefoliatedN;

            // get amounts actually removed from field and that to be returned (dung/urine)
            if (DMRemoveType == removeDMTypes.RemoveAll)
                fractionDM2Remove = 1.0;
            else if (DMRemoveType == removeDMTypes.RemoveNone)
                fractionDM2Remove = 0.0;
            else
            {
                fractionDM2Remove = 0.0;
                foreach (AgPasture.PastureSpecies species in Pasture)
                    fractionDM2Remove += species.HarvestedDigestibility * species.HarvestedWt;
                fractionDM2Remove /= removeAmount;
            }
            
            RemovedWt = HarvestedWt * fractionDM2Remove;
            RemovedN = HarvestedN * FractionN2Remove;
            ReturnedWt = HarvestedWt - RemovedWt;
            ReturnedN = HarvestedN - RemovedN;

            if (ReturnType == returnTypes.AsDungUrine)
            {
                if (NDungType == dungNContentTypes.DefineProportion)
                    NReturnedInDung = ReturnedN * ProportionN2Dung;
                else
                    NReturnedInDung = Math.Min(ReturnedN, ReturnedWt * 0.4 / CNRatioDung);
                NReturnedInUrine = ReturnedN - NReturnedInDung;
            }
            else
            {
                NReturnedInDung = 0.0;
                NReturnedInUrine = 0.0;
            }
        }
        
        // Return dung and urine
        private void returnExcreta()
        {
            if ((ReturnedWt > 0.0) || (NReturnedInDung > 0.0))
            {
                PMF.BiomassRemovedType BiomassDung = new PMF.BiomassRemovedType();
                string[] type = new string[] { "RuminantDung_PastureFed" };
                float[] dltdm = new float[] { (Single)ReturnedWt };
                float[] dltn = new float[] { (Single)NReturnedInDung };
                float[] dltp = new float[] { 0 };
                float[] fraction = new float[] { 1 };     // fraction is always 1.0 here

                BiomassDung.crop_type = "RuminantDung_PastureFed";
                BiomassDung.dm_type = type;
                BiomassDung.dlt_crop_dm = dltdm;
                BiomassDung.dlt_dm_n = dltn;
                BiomassDung.dlt_dm_p = dltp;
                BiomassDung.fraction_to_residue = fraction;
                BiomassRemoved.Invoke(BiomassDung);
            }

            if (NReturnedInUrine > 0.0)
            {
                double[] myUrineDeposition = new double[nLayers];
                for (int z = 0; z < nLayers; z++)
                    myUrineDeposition[z] = NReturnedInUrine * fractionUrine[z];

                no3.AddKgHaDelta(SoluteSetterType.Fertiliser, myUrineDeposition);
                //fertiliser.Apply(NReturnedInUrine * 10, "UreaN", 1.0);
            }
        }

        // Return pasture residues
        private void returnResidues()
        {
            if ((ReturnedWt > 0.0) || (ReturnedN > 0.0))
            {
                PMF.BiomassRemovedType BiomassDung = new PMF.BiomassRemovedType();
                string[] type = new string[] { "Grass" };
                float[] dltdm = new float[] { (Single)ReturnedWt };
                float[] dltn = new float[] { (Single)ReturnedN };
                float[] dltp = new float[] { 0 };
                float[] fraction = new float[] { 1 };     // fraction is always 1.0 here

                BiomassDung.crop_type = "Grass";
                BiomassDung.dm_type = type;
                BiomassDung.dlt_crop_dm = dltdm;
                BiomassDung.dlt_dm_n = dltn;
                BiomassDung.dlt_dm_p = dltp;
                BiomassDung.fraction_to_residue = fraction;
                BiomassRemoved.Invoke(BiomassDung);
            }
        }
        
        // Auxiliary bits and pieces  - - - - - - - - - - - - - - - - - - - - - - - -  - - - - -  - -

        public enum yesnoType
        {
            /// <summary>a positive answer</summary>
            yes,
            /// <summary>a negative answer</summary>
            no
        }

        public enum removeAmountTypes
        {
            /// <summary>Setting DM amount to remove</summary>
            DMToRemove,
            /// <summary>Setting residual DM amount</summary>
            ResidualDM
        }

        public enum rotationIntervalTypes
        {
            /// <summary>Setting a fixed interval</summary>
            FixedInterval,
            /// <summary>Setting a target (minimum) inteval</summary>
            TargetInterval
        }

        public enum removeDMTypes
        {
            /// <summary>Remove all DM</summary>
            RemoveAll,
            /// <summary>Remove no DM</summary>
            RemoveNone,
            /// <summary>Remove a fraction based on digestibility</summary>
            BasedOnDigestibility
        }
        
        public enum returnTypes
        {
            /// <summary>Return plant material as residue</summary>
            AsResidue,
            /// <summary>Return meterial as dung and urine</summary>
            AsDungUrine
        }

        public enum dungNContentTypes
        {
            /// <summary>Define the proportion of N returned as dung</summary>
            DefineProportion,
            /// <summary>Define the C:N of dung</summary>
            DefineCNratio,
        }
    }
}
```
          Manager AutomaticFertiliser
            AllowFertiliser = yes
            Depth2SoilN = 500
            CriticalSoilN = 5
            FertNAmount = 25
            FertType = UreaN
            FertApplicationDepth = 1
            FertMinimumDays = 15
```csharp
using Newtonsoft.Json;
using Models.Soils.Nutrients;
using Models.Interfaces;
using System.Xml.Serialization;
using APSIM.Shared.Utilities;
using Models.Soils;
using Models.PMF;
using Models.Core;
using System;
using System.Linq;

namespace Models
{
    [Serializable]
    public class Script : Model
    {
        [Link] private Clock Clock;
        [Link] private Fertiliser fertiliser;
        [Link] private ISummary summary;
        [Link] private Soil Soil;
        private DateTime lastApplicationDate;
        private bool fertiliserIsAllowed;
        private int nLayers;
        [Link(ByName = true)]
        private ISolute NO3;
        [Link(ByName = true)]
        private ISolute NH4;
        [Link(ByName = true)]
        private ISolute Urea;
        [Link]
        private IPhysical soilPhysical;

        //User inputs from properties tab
        [Description("Turn ferliser applications on? ")]
        public yesnoType AllowFertiliser { get; set; }
        
        [Description("Depth to calculate available soil N (mm): ")]
        public double Depth2SoilN { get; set; }

        [Description("Minimum available N, triggers an application (kgN/ha): ")]
        public double CriticalSoilN { get; set; }

        [Description("Amount of N fertiliser for each application (kgN/ha): ")]
        public double FertNAmount { get; set; }

        [Description("Type of N fertiliser to apply: ")]
        [Display(Type = DisplayType.FertiliserType)]public string FertType { get; set; }

        [Description("Depth at which to apply the fertiliser (mm): ")]
        public double FertApplicationDepth { get; set; }
       
        [Description("Minimum period between applications (days): ")]
        public double FertMinimumDays { get; set; }
       
        public enum yesnoType
        {
            /// <summary>a positive answer</summary>
            yes,
            /// <summary>a negative answer</summary>
            no
        }

        [JsonIgnore] public double TopMineralN { get; set; }
        

        [EventSubscribe("StartOfSimulation")]
        private void OnStartOfSimulation(object sender, EventArgs e)
        {
            fertiliserIsAllowed = (AllowFertiliser == yesnoType.yes);
            nLayers = soilPhysical.Thickness.Length;
        }

        [EventSubscribe("DoManagement")]
        private void OnDoManagement(object sender, EventArgs e)
        {
            double daysSinceLastApplication = (Clock.Today - lastApplicationDate).TotalDays;
            
            // get the N stored in the soil
            double depthFromSurface = 0.0;
            double fracLayer = 0.0;
            TopMineralN = 0.0;
            for (int layer = 0; layer < nLayers; layer++)
            {
                fracLayer = Math.Min(1.0, (Depth2SoilN - depthFromSurface) / soilPhysical.Thickness[layer]);
                TopMineralN += (NO3.kgha[layer]
                + NH4.kgha[layer]
                + Urea.kgha[layer])
                * fracLayer;
                depthFromSurface += soilPhysical.Thickness[layer];
                if (depthFromSurface >= Depth2SoilN)
                    layer = nLayers;
            }

            if (fertiliserIsAllowed && (daysSinceLastApplication >= FertMinimumDays) && (TopMineralN <= CriticalSoilN))
            {
                fertiliser.Apply(FertNAmount, FertType, FertApplicationDepth);
                lastApplicationDate = Clock.Today;
            }
        }
    }
}
```
          Manager FertiliseOnFixedDates
            EachYear = True
            Dates = 5-jan, 5-feb, 5-mar, 5-apr, 5-aug, 5-sep, 5-oct, 5-nov, 5-dec
            UseCritNThreshold = False
            CritNThreshold = 50
            CritNDepth = 75
            Depth = 50
            Amount = 25
            FertiliserType = UreaN
```csharp
using APSIM.Core;
using System;
using Models.Core;
using Models.Soils.Nutrients;
using Models.Soils;
using Models.PMF;
using APSIM.Shared.Utilities;
using System.Linq;
using Models.Interfaces;

namespace Models
{
    [Serializable]
    public class Script : Model, IStructureDependency
    {
        [Link] private Clock clock;
        [Link] private Fertiliser fertiliser;
        [Link] private ISummary summary;
        [Link] private Soil soil;
        private Nutrient nutrient;
        private Nutrient soilN;
        [Link]
        private IPhysical soilPhysical;
        [Link]
        private Nutrient Nutrient;
        [Link(Path="[SurfaceOrganicMatter].SurfaceResidue.Decomposition")]
        private OrganicFlow ResidueDecomposition;
        public IStructure Structure { private get; set; }
        
        


        [Separator("Fertiliser will be applied on the date(s) below")]
        [Description("Apply fertiliser on the same day(s) each year? If no, then must include the year of appliaction below")]
        public bool EachYear { get; set; }

        [Description("Dates for one or more fertiliser applications (dd-mmm or dd-mmm-yyyy) as a list with a comma between dates")]
        public string[] Dates { get; set; }

        [Separator("Test for the mineral N in the soil and don't apply the fertiliser if greater than X kgN/ha is stored in the soil above a depth of Y mm")]
        [Description("Use a critical soil mineral N to prevent application above a threshold?")]
        public bool UseCritNThreshold { get; set; }

        [Description("Don't add fertiliser if N in the soil to the depth below exceeds (kg/ha)")]
        public double CritNThreshold { get; set; }

        [Description("Depth to which the amount of N in the soil should be calculated (mm)")]
        public double CritNDepth { get; set; }

        [Separator("Fertiliser application details")]
        [Description("Depth at which to apply the fertiliser (mm)")]
        public double Depth { get; set; }

        [Description("Amount of fertiliser to apply (kg N /ha) per application")]
        public double Amount { get; set; }

        [Description("Fertiliser type - select from the list")]
        [Display(Type = DisplayType.FertiliserType)]public string FertiliserType { get; set; }


        [EventSubscribe("StartOfSimulation")]
        private void FindSoilNOrNutrient(object sender, EventArgs e)
        {
            nutrient =  Structure.Find<Nutrient>() as Nutrient;
            soilN =  Structure.Find<Nutrient>() as Nutrient;

            if (nutrient == null && soilN == null)
                throw new Exception(string.Format("Error in script {0}: Unable to find nutrient or soilN.", Name));
        }

        [EventSubscribe("DoManagement")]
        private void OnDoManagement(object sender, EventArgs e)
        {
            if (OnApplicationDate())
            {
                if (NContentBelowThreshold())
                    fertiliser.Apply(Amount, FertiliserType, Depth);
                else
                    summary.WriteMessage(this, "Skipping fertiliser application due to soil mineral N content being above critical threshold.", MessageType.Diagnostic);
            }
        }

        /// <summary>Checks if today's date is one of the specified fertiliser application dates.</summary>
        private bool OnApplicationDate()
        {
            if (EachYear)
                return Dates.Any(d => DateUtilities.DatesEqual(d, clock.Today));
            
            DateTime[] dates = Dates.Select(d => DateTime.ParseExact(d, "d-MMM-yyyy", null)).ToArray();
            return dates.Any(d => SameDate(d, clock.Today));
        }

        /// <summary>Checks if N content in soil is below critical threshold.</summary>
        private bool NContentBelowThreshold()
        {
            if (!UseCritNThreshold)
                return true;
            
            double[] weights = GetLayerWeights();
            double cumSoilN = 0;

            for (int i = 0; i < soilPhysical.Thickness.Length; i++)
            {
                if (nutrient != null)
                    cumSoilN += weights[i] * nutrient.MineralN[i];
                else if (soilN != null)
                    cumSoilN += weights[i] * soilN.MineralN[i];
            }

            return cumSoilN <= CritNThreshold;
        }

        private double[] GetLayerWeights()
        {
            double[] weights = new double[soilPhysical.Thickness.Length];
            double cumDepth = 0;

            for (int i = 0; i < soilPhysical.Thickness.Length; i++)
            {
                cumDepth += soilPhysical.Thickness[i];
                if (cumDepth < CritNDepth)
                    weights[i] = 1;
                else if (cumDepth - soilPhysical.Thickness[i] <= CritNDepth)
                    weights[i] = (CritNDepth - (cumDepth - soilPhysical.Thickness[i])) / soilPhysical.Thickness[i];
                else
                    weights[i] = 0;
            }

            return weights;
        }

        private bool SameDate(DateTime d1, DateTime d2)
        {
            return d1.Year == d2.Year && d1.DayOfYear == d2.DayOfYear;
        }
    }
}
```
          Manager AutomaticIrrigation
            allowIrrigation = True
            seasonStart = 15-Aug
            seasonEnd = 30-May
            seasonsAllocation = 10000
            triggerDeficit = 75
            targetDeficit = 99
            returndays = 1
            maximumAmount = 30
            depthPAWC = 300
```csharp
using Newtonsoft.Json;
using APSIM.Shared.Utilities;
using System.Xml.Serialization;
using Models.Soils;
using Models.PMF;
using Models.Core;
using System;
using System.Linq;
using Models.Interfaces;

        
namespace Models
{
    [Serializable] 
    [System.Xml.Serialization.XmlInclude(typeof(Model))]
    public class Script : Model
    {
        [Link] private ISummary summary;
        [Link] private Irrigation Irrigation;
        [Link] private Clock Clock;
        [Link] private Soil Soil;
        [Link(IsOptional = true)] private IPlant existingCrop;
        private DateTime StartDate;
        private DateTime EndDate;
        private double TopDUL;
        private double TopLL;
        private int nLayers;
        [Link]
        private IPhysical soilPhysical;
        [Link]
        private ISoilWater waterBalance;
        //Communication to other modules
       
        //User inputs from properties tab
        [Description("Turn irrigation on?")]
        public bool allowIrrigation { get; set; }
        [Description("Start of irrigation season (dd-MMM)")]
        public string seasonStart { get; set; }
        [Description("End of irrigation season (dd-MMM)")]
        public string seasonEnd { get; set; }
        [Description("Season allocation (mm)")]
        public double seasonsAllocation { get; set; }
        [Description("Deficit to trigger irrigation (% PAWC)")]
        public double triggerDeficit { get; set; }
        [Description("Deficit to stop irrigaton (% PAWC)")]
        public double targetDeficit { get; set; }
        [Description("Minimum days for irrigation to return")]
        public double returndays { get; set; }
        [Description("Maximum irrigation application (mm/day)")]
        public double maximumAmount { get; set; }
        [Description("Depth to calculate PAWC (mm)")]
        public double depthPAWC { get; set; }

        //Class members
        [JsonIgnore] public double TopSWdeficit { get; set; }
        [JsonIgnore] public double TopSWC { get; set; }
        [JsonIgnore] public double DaysSinceIrrigation { get; set; }
        [JsonIgnore] public double AmountToApply { get; set; }
        [JsonIgnore] public double SeasonAppliedAmount { get; set; }
        
        private bool IrrigationIsAllowed { get; set; }
        private bool SeasonIsOpen { get; set; }
        private bool CropIsActive { get; set; }
        private bool IrrigatorIsAvailable { get; set; }
        private bool SoilIsDry { get; set; }

    
        //Calculate static soil variables
        [EventSubscribe("StartOfSimulation")]
        private void OnStartOfSimulation(object sender, EventArgs e)
        {   
            //Set the season dates
            StartDate = DateTime.Parse(seasonStart + "-" + Clock.Today.Year.ToString());
            EndDate = DateTime.Parse(seasonEnd + "-" + Clock.Today.Year.ToString());
            
            //Can we irrigate at all?
            IrrigationIsAllowed = false; 
            if (allowIrrigation)
                IrrigationIsAllowed = true; 

            //Calculate soil water variables
            double depthFromSurface = 0.0;
            double fracLayer = 0.0;
            nLayers = soilPhysical.Thickness.Length;
            for (int layer = 0; layer < nLayers; layer++)
            {
                fracLayer = Math.Min(1.0, (depthPAWC - depthFromSurface) / soilPhysical.Thickness[layer]);
                TopLL += soilPhysical.LL15mm[layer] * fracLayer;
                TopDUL += soilPhysical.DULmm[layer] * fracLayer;
                depthFromSurface += soilPhysical.Thickness[layer];
                if (depthFromSurface >= depthPAWC)
                    layer = nLayers;
            }
        }
             
        //Determine daily requirement for irrigation
        [EventSubscribe("StartOfDay")]
        private void OnStartOfDay(object sender, EventArgs e)
        {
            //Can we irrigate today?          
            SeasonIsOpen = isBetween(Clock.Today, StartDate, EndDate);

            //Is there a crop in the ground that needs irrigation?
            CropIsActive = false;
            if ((existingCrop != null) && (existingCrop.IsAlive))
                CropIsActive = true;
            //if ((existingCrop.Phenology.Stage >= 3.0) && (existingCrop.Phenology.Stage < 6.0))
          
            //Is the irrigator available?
            IrrigatorIsAvailable = false;
            DaysSinceIrrigation += 1;
            if (DaysSinceIrrigation >= returndays)
                IrrigatorIsAvailable = true;
          
            //Is the soil dry enough to require irrigation?
            SoilIsDry = false;
            double depthFromSurface = 0.0;
            double fracLayer = 0.0;
            TopSWC = 0.0;
            for (int layer = 0; layer < nLayers; layer++)
            //for (int layer = 0; depthFromSurface < depthPAWC + soilPhysical.Thickness[layer]; layer++)
            {
                fracLayer = Math.Min(1.0, (depthPAWC - depthFromSurface) / soilPhysical.Thickness[layer]);
                TopSWC += waterBalance.SWmm[layer] * fracLayer;
                depthFromSurface += soilPhysical.Thickness[layer];
                if (depthFromSurface >= depthPAWC)
                    layer = nLayers;
            }
            
            TopSWdeficit = TopSWC - TopDUL;
            if (Math.Max(0.0, -TopSWdeficit) >= (TopDUL - TopLL) * (100 - triggerDeficit) / 100)
                SoilIsDry = true;
                
            //Are all the conditions ratifying irrigation
            if (IrrigationIsAllowed && SeasonIsOpen && CropIsActive && IrrigatorIsAvailable && SoilIsDry)
            {
                //Lets bloody well irrigate then!!!!
                AmountToApply = TopDUL * targetDeficit / 100 - TopSWC;
                AmountToApply = Math.Max(0.0, Math.Min(AmountToApply, seasonsAllocation - SeasonAppliedAmount));
                Irrigation.Apply(AmountToApply);
                DaysSinceIrrigation = 0;
                SeasonAppliedAmount += AmountToApply;
            }
        }
        
        ///Checks whether theDate is between iniDate and endDate (non-year specific)
        private bool isBetween(DateTime theDay, DateTime iniDate, DateTime endDate)
        {
            bool result = false;
            if (iniDate.DayOfYear < endDate.DayOfYear)
            {
                // period is within one year, ex: summer in the northern hemisphere
                if ((theDay.DayOfYear >= iniDate.DayOfYear) && (theDay.DayOfYear <= endDate.DayOfYear))
                    result = true;
            }
            else
            {
                // period goes over the end of the year, ex: summer in the southern hemisphere
                if ((theDay.DayOfYear >= iniDate.DayOfYear) || (theDay.DayOfYear <= endDate.DayOfYear))
                    result = true;
            }
            
            return result;
        }
    }
}
```
          Manager ReportHelper
            ReportEveryYear_Name = [AnnualReporting]
            ReportEveryYear_Dates = 30-jun
            ReportSpecificDates_Name =
            ReportSpecificDates_Dates =
            script: same as in SimpleReportingSim.Field.ReportHelper
          MicroClimate: a_interception=0; b_interception=1; c_interception=0; d_interception=0; SoilHeatFluxFraction=0.4; MinimumHeightDiffForNewLayer=0; NightInterceptionFraction=0.5; ReferenceHeight=2
          Irrigation
          Fertiliser
          SurfaceOrganicMatter: InitialResidueName=Sward; InitialResidueType=grass; InitialResidueMass=1000; InitialStandingFraction=0; InitialCPR=0; InitialCNR=15
          Soil: SoilType=NZ_Sedimentary; LocalName=Lismore; Site=Winchmore; NearestTown=Ashburton; Region=Canterbury; Country=New Zealand; Latitude=-48.48; Longitude=0
            Chemical: Thickness=[150, 150, 200, 150, 250, 300, 300]; PH=[6, 6, 6, 6, 6, 6, 6]; PHUnits=Water
            Physical
              Thickness  ParticleSizeClay  BD    AirDry  LL15   DUL    SAT   KS
              150        20                1.3   0.05    0.15   0.36   0.45  5000
              150        15                1.35  0.12    0.14   0.34   0.43  2500
              200        12                1     0.055   0.055  0.19   0.25  3000
              150        8                 0.53  0.015   0.015  0.065  0.15  10000
              250        6                 0.31  0.01    0.01   0.04   0.11  17500
              300        5                 0.3   0.01    0.01   0.03   0.11  20000
              300        5                 0.3   0.01    0.01   0.03   0.11  20000
              SoilCrop AGPRyegrassSoil: LL=[0.15, 0.14, 0.06, 0.02, 0.01, 0.01, 0.01]; KL=[0.1, 0.1, 0.08, 0.04, 0.01, 0, 0]; XF=[1, 1, 1, 1, 1, 0, 0]
              SoilCrop AGPWhiteCloverSoil: LL=[0.15, 0.14, 0.06, 0.02, 0.01, 0.01, 0.01]; KL=[0.1, 0.1, 0.08, 0.04, 0.01, 0, 0]; XF=[1, 1, 1, 1, 1, 0, 0]
            WaterBalance SoilWater: SummerDate=1-Nov; SummerU=6; SummerCona=3.5; WinterDate=1-apr; WinterU=2; WinterCona=2; DiffusConst=88; DiffusSlope=35; Salb=0.13; CN2Bare=73; CNRed=20; CNCov=0.8; DischargeWidth=0; CatchmentArea=0; PSIDul=-100
              Thickness  SWCON  KLAT
              150        0.5    0
              150        0.52   0
              200        0.55   0
              150        0.6    0
              250        0.65   0
              300        0.65   0
              300        0.65   0
            Nutrient
            Organic: FOMCNRatio=40; CarbonUnits=Total
              Thickness  Carbon  SoilCNRatio  FBiom  FInert  FOM
              150        3       12           0.04   0.5     331.337
              150        1       12           0.02   0.7     245.461
              200        0.6     12           0.02   0.83    164.537
              150        0.4     12           0.01   0.9     121.892
              250        0.25    12           0.01   0.95    73.931
              300        0.15    12           0      0.99    40.574
              300        0.1     12           0      0.99    22.268
            Water: Thickness=[150, 150, 200, 150, 250, 300, 300]; InitialValues=[0.3495, 0.33, 0.18325, 0.0625, 0.0385, 0.029, 0.029]; FilledFromTop=false
            Solute NO3: Thickness=[150, 150, 200, 150, 250, 300, 300]; InitialValues=[5, 2.5, 1, 0.75, 0.5, 0.5, 0.5]; InitialValuesUnits=ppm; WaterTableConcentration=0; D0=0; DepthConstant=0; MaxDepthSoluteAccessible=0; RunoffEffectivenessAtMovingSolute=0; MaxEffectiveRunoff=0
            Solute NH4: Thickness=[150, 150, 200, 150, 250, 300, 300]; InitialValues=[0.1, 0.1, 0.1, 0.1, 0.1, 0.1, 0.1]; InitialValuesUnits=ppm; WaterTableConcentration=0; D0=0; DepthConstant=0; MaxDepthSoluteAccessible=0; RunoffEffectivenessAtMovingSolute=0; MaxEffectiveRunoff=0
            Solute Urea: Thickness=[150, 150, 200, 150, 250, 300, 300]; InitialValues=[0, 0, 0, 0, 0, 0, 0]; InitialValuesUnits=ppm; WaterTableConcentration=0; D0=0; DepthConstant=0; MaxDepthSoluteAccessible=0; RunoffEffectivenessAtMovingSolute=0; MaxEffectiveRunoff=0
            SoilTemperature Temperature
          PastureSpecies AGPRyegrass: doyGermination=275; daysEmergenceToAnthesis=120; daysAnthesisToMaturity=85; degreesDayForAnthesis=1100; degreesDayForMaturity=900; daysAnnualsFactor=45; CanopyType=PastureSpecies; InitialShootDM=1500; InitialRootDM=450; InitialRootDepth=750; initialDMFractionsGrasses=[0.15, 0.25, 0.25, 0.05, 0.05, 0.1, 0.1, 0.05, 0, 0, 0]; initialDMFractionsForbs=[0.2, 0.2, 0.15, 0.05, 0.1, 0.15, 0.1, 0.05, 0, 0, 0]; PhotosyntheticEfficiency=0.01; PhotosynthesisCurveFactor=0.8; FractionPAR=0.5; ReferenceCO2=380; CO2EffectScaleFactor=700; CO2EffectOffsetFactor=600; CO2EffectMinimum=0.7; CO2EffectExponent=2; ReproSeasonDurationCoeff=2; ReproSeasonShouldersLengthFactor=1; ReproSeasonOnsetDurationFactor=0.6; RelativeTurnoverEmerging=2; DetachmentDroughtCoefficient=3; DetachmentDroughtEffectMin=0.1; TurnoverStockFactor=0.01; TurnoverDefoliationEffectMin=0.025; MinimumGreenLeafProp=0.8; MinimumGreenRootProp=0.5
            initialDMFractionsLegumes=[0.16, 0.23, 0.22, 0.05, 0.03, 0.05, 0.05, 0.01, 0.04, 0.08, 0.08]
            LinearInterpolationFunction FVPDFunction
          PastureSpecies AGPWhiteClover: doyGermination=275; daysEmergenceToAnthesis=120; daysAnthesisToMaturity=85; degreesDayForAnthesis=1100; degreesDayForMaturity=900; daysAnnualsFactor=45; CanopyType=PastureSpecies; InitialShootDM=500; InitialRootDM=150; InitialRootDepth=350; initialDMFractionsGrasses=[0.15, 0.25, 0.25, 0.05, 0.05, 0.1, 0.1, 0.05, 0, 0, 0]; initialDMFractionsForbs=[0.2, 0.2, 0.15, 0.05, 0.1, 0.15, 0.1, 0.05, 0, 0, 0]; PhotosyntheticEfficiency=0.01; PhotosynthesisCurveFactor=0.8; FractionPAR=0.5; ReferenceCO2=380; CO2EffectScaleFactor=700; CO2EffectOffsetFactor=600; CO2EffectMinimum=0.7; CO2EffectExponent=2; ReproSeasonDurationCoeff=2; ReproSeasonShouldersLengthFactor=1; ReproSeasonOnsetDurationFactor=0.6; RelativeTurnoverEmerging=2; DetachmentDroughtCoefficient=3; DetachmentDroughtEffectMin=0.1; TurnoverStockFactor=0.01; TurnoverDefoliationEffectMin=0.025; MinimumGreenLeafProp=0.8; MinimumGreenRootProp=0.5
            initialDMFractionsLegumes=[0.16, 0.23, 0.22, 0.05, 0.03, 0.05, 0.05, 0.01, 0.04, 0.08, 0.08]
            LinearInterpolationFunction FVPDFunction
          Report AnnualReporting
            VariableNames:
              [Clock].Today as Date
              Sum of ([AGPRyegrass].NetGrowthWt + [AGPWhiteClover].NetGrowthWt) from [AnnualReporting].DayAfterLastOutput to [Clock].Today as SumYearlyNetGrowth
              Sum ([Soil].Nutrient.TotalC)/1000 as SoilCarbonToday_tonnesPerHa
              Diff of Sum([Soil].Nutrient.TotalC) from [Clock].StartOfSimulation to [Clock].Today as ChangeInSoilCarbon  // this is a duplicate of that below as an example - this is more generic and will be valid if the start date is changed
              Diff of Sum([Soil].Nutrient.TotalC) from 01-jul-1980 to [Clock].Today as ChangeInSoilCarbon1               // the simulation starts on 1-7-80 so this gives the same output as above
              Diff of Sum([Soil].Nutrient.TotalC) from 01-jul to [Clock].Today as AnnualChangeInSoilCarbon
          Report MonthlyReporting: EventNames=[Clock].EndOfMonth
            VariableNames:
              [Clock].Today as Date
              Sum of ([AGPRyegrass].NetGrowthWt + [AGPWhiteClover].NetGrowthWt) from 1-Jul to [Clock].Today as CumulativeAnnualNetGrowth
              Mean of [Soil].SoilWater.Drainage from [MonthlyReporting].DayAfterLastOutput to [Clock].Today as MeanDrainage_mmPerDay
              Sum of [Soil].SoilWater.LeachNO3 from [MonthlyReporting].DayAfterLastOutput to [Clock].Today as SumLeaching_kgPerHa
              Sum of [Soil].SoilWater.LeachNO3 from 1-Jan to [Clock].Today as CumulativeAnnualLeaching
          Report DailyReporting: EventNames=[Clock].EndOfDay
            VariableNames:
              [Clock].Today as Date
              [Soil].SoilWater.LeachNO3
              [Soil].SoilWater.Drainage
              Sum([Soil].NO3.kgha)
      Folder Getting Annual Patterns of Herbage Accumulation
        Memo
          When working with perennial crops that are harvested or grazed frequently, often an output that plots the accumulation of growth during a year is wanted. That output should be zeroed between years. If simulating a site in the Southern Hemisphere, usually the end of the year will be in June or July (winter). Here this is achieved as "CumulativeAnnualNetGrowth" using reporting at the end of the month (see in MonthlyReporting) and:

          		Sum of ([Ryegrass].NetGrowthWt + [WhiteClover].NetGrowthWt)
          			from 1-Jul to [Clock].Today as CumulativeAnnualNetGrowth

          with the output shown as the orange line below. Note that here it is necessary to calculate the output summing ryegrass and white clover. For comparison, the pattern of accumulation is plotted against the annual total (green line) and that was specified in AnnualReporting using:

          		Sum of ([Ryegrass].NetGrowthWt + [WhiteClover].NetGrowthWt)
          			from [AnnualReporting].DayAfterLastOutput to [Clock].Today
          			as SumYearlyNetGrowth
      Folder Working with Soil Carbon
        Memo
          When working with soil carbon (or organic nitrogen), gradual changes can hide systematic changes because the totals are so large and while the changes are small, they become important. In this example, using annual reporting only, there are three examples of reporting soil carbon.

          The green line is the total soil carbon and is the most basic output. The specification is:

          		Sum([Soil].SoilNitrogen.TotalC)/1000 as SoilCarbonToday_tonnesPerHa
          where the "/1000" converts the standard output from kg /ha to tonnes /ha. The output is plotted against the right-hand axis and shows little change.

          The orange line is the annual **change** in soil carbon (plotted against the left-hand axis) was created using:

          	Diff of Sum([Soil].SoilNitrogen.TotalC) from [Clock].StartOfSimulation
          				to [Clock].Today as ChangeInSoilCarbon

          This clearly shows that soil carbon is increasing most years but that the increase is diminishing towards the end of the simulation. Note that for this simulation the line could also have been created using:

          	Diff of Sum([Soil].SoilNitrogen.TotalC)
          		from 01-jul-1980 to [Clock].Today as ChangeInSoilCarbon

          but the first version is more generic in that if the start date of the simulation is changed it will still be valid. The second version can be more useful where there is an initial spin-up period of several years before changes in soil carbon are of interest. Another form of soil carbon output that can be useful is the change within any year. That (the blue line) shows even more clearly the slow stabilisation of the total carbon and is specified using:

          	Diff of Sum([Soil].SoilNitrogen.TotalC)
          		from 01-jul to [Clock].Today as AnnualChangeInSoilCarbon
      Folder Daily and Monthly Leaching
        Memo
          The example below shows daily, monthly, and cumulative annual leaching. The daily output is from "DailyReporting" and is simply:

          		[Soil].SoilWater.LeachNO3
          The other two outputs are both calculated in "MonthlyReporting" as:

          		Sum of [Soil].SoilWater.LeachNO3 from [MonthlyReporting].DayAfterLastOutput
          			to [Clock].Today as SumLeaching_kgPerHa
          and

          		Sum of [Soil].SoilWater.LeachNO3
          			from 1-Jan to [Clock].Today as CumLeaching_kgPerHa
    Folder Annual Crop Example
      Memo
        In annual cropping simulations, users often want to know the values of outputs only during the period that the crop is in the ground with the outputs summarised over the interval between sowing and harvesting. The examples in this section show how to do this and also show some results that might be unexpected to look out for.

        Note this example also shows and example of specifying dates in the report frequency e.g.

        		1-jan
        		1-feb
        		1-mar
        		2-jan-1980

        See ReportSpecificDates report model.
      Simulation ContinuousWheatExample
        Clock: Start=1980-01-01; End=1990-12-31
        Summary SummaryFile
        Weather: FileName=%root%/Examples/WeatherFiles/AU_Dalby.met
        SoilArbitrator
        Zone Field: Area=1; Slope=0; AspectAngle=0; Altitude=50
          Manager Sowing: same as SimpleReportingSim.Field.Sowing
          Manager Fertilise at sowing
            Crop = [Wheat]
            FertiliserType = UreaN
            Amount = 80
            script: same as in SimpleReportingSim.Field.Fertilise at sowing
          Manager Harvest: same as SimpleReportingSim.Field.Harvest
          Manager ReportHelper
            ReportEveryYear_Name =
            ReportEveryYear_Dates =
            ReportSpecificDates_Name =
            ReportSpecificDates_Dates =
            script: same as in SimpleReportingSim.Field.ReportHelper
          Fertiliser
          Irrigation
          MicroClimate: a_interception=0; b_interception=1; c_interception=0; d_interception=0; SoilHeatFluxFraction=0.4; MinimumHeightDiffForNewLayer=0; NightInterceptionFraction=0.5; ReferenceHeight=2
          Plant Wheat
          SurfaceOrganicMatter: InitialResidueName=wheat_stubble; InitialResidueType=wheat; InitialResidueMass=500; InitialStandingFraction=0; InitialCPR=0; InitialCNR=100
          Soil: ASCOrder=Vertosol; ASCSubOrder=Black; SoilType=Clay; Site=Norwin; NearestTown=Norwin; Region=Darling Downs and Granite Belt; State=Queensland; Country=Australia; NaturalVegetation=Qld. Bluegrass, possible Qld. Blue gum; ApsoilNumber=900; Latitude=-27.581836; Longitude=151.320206; LocationAccuracy=+/- 20m
            DataSource=CSIRO Sustainable Ecosystems, Toowoomba; Characteriesd as part of the GRDC funded project"Doing it better, doing it smarter, managing soil water in Australian agriculture' 2011
            Comments=OC, CLL for all crops estimated-based on Bongeen Mywybilla Soil No1
            Physical
              Thickness  BD       AirDry    LL15      DUL       SAT       KS
              150        1.01056  0.13025   0.2605    0.521     0.588655  20
              150        1.07146  0.198689  0.248362  0.496723  0.565677  20
              300        1.09394  0.28      0.28      0.488438  0.557193  20
              300        1.15861  0.28      0.28      0.480297  0.532787  20
              300        1.17301  0.28      0.28      0.471584  0.527354  20
              300        1.16287  0.28      0.28      0.457071  0.53118   20
              300        1.1875   0.28      0.28      0.452332  0.521888  20
              SoilCrop WheatSoil: LL=[0.261, 0.248, 0.28, 0.306, 0.36, 0.392, 0.446]; KL=[0.06, 0.06, 0.06, 0.04, 0.04, 0.02, 0.01]; XF=[1, 1, 1, 1, 1, 1, 1]
            WaterBalance SoilWater: same as SimpleReportingSim.Field.Soil.SoilWater
            Organic: same as SimpleReportingSim.Field.Soil.Organic
            Chemical: Thickness=[150, 150, 300, 300, 300, 300, 300]; PH=[8, 8, 8, 8, 8, 8, 8]; PHUnits=Water
            Water: Thickness=[150, 150, 300, 300, 300, 300, 300]; FilledFromTop=false
              InitialValues=[0.521, 0.496723, 0.488438, 0.480297, 0.471584, 0.457071, 0.452332]
            Nutrient
            Solute NO3: same as SimpleReportingSim.Field.Soil.NO3
            Solute NH4: same as SimpleReportingSim.Field.Soil.NH4
            Solute Urea: same as SimpleReportingSim.Field.Soil.Urea
            SoilTemperature Temperature
          Report ReportInCropAnnually: EventNames=[Clock].EndOfYear
            VariableNames:
              [Clock].Today as Date
              [Clock].Today.Year as Year
              Sum of [Weather].Rain from [Wheat].Sowing to [Wheat].Harvesting as InCropRainfall
              Sum of [Weather].Rain from 1-Jan to [Clock].Today as AllYearRainfall
              Mean of Sum([Soil].Water.MM) from [Wheat].Sowing to [Wheat].Harvesting as InCropMeanSoilWater
              Mean of Sum([Soil].Water.MM[:3]) from [Wheat].Sowing to [Wheat].Harvesting as InCropMeanSoilWaterTopThreeLayers
              Mean of Sum([Soil].Water.MM[:3]) from [Wheat].Sowing to [Wheat].Flowering as VegetativeMeanSoilWaterTopThreeLayers
              Mean of Sum([Soil].Water.MM[:3]) from [Wheat].Flowering to [Wheat].Harvesting as ReproductiveMeanSoilWaterTopThreeLayers
              Max of ([Wheat].Grain.Wt * 10000 / 1000) from [Wheat].Sowing to [Wheat].Harvesting as FinalYield_kg_Ha // * 10000 / 1000 to convert from g/m2 to kg/ha
              Max of ([Wheat].Grain.Wt * 10000 / 1000) from [ReportInCropAnnually].DayAfterLastOutput to [Wheat].Harvesting as FinalYield_kg_Ha_v1
          Report ReportGrainOnHarvesting: EventNames=[Wheat].Harvesting
            VariableNames:
              [Clock].Today as Date
              [Clock].Today.Year as Year
              ([Wheat].Grain.Wt * 10000 / 1000) as HarvestedYield_kg_Ha
          Report ReportGrainDaily: EventNames=[Clock].EndOfDay
            VariableNames:
              [Clock].Today as Date
              [Clock].Today.Year as Year
              ([Wheat].Grain.Wt * 10000 / 1000) as Grain_kg_Ha_Daily // * 10000 / 1000 to convert from g/m2 to kg/ha
          Report ReportSpecificDates
            VariableNames:
              [Clock].Today as Date
              [Clock].Today.Year as Year
              ([Wheat].Grain.Wt * 10000 / 1000) as Grain_kg_Ha_Daily // * 10000 / 1000 to convert from g/m2 to kg/ha
            EventNames:
              1-jan
              1-feb
              1-mar
              2-jan-1980
      Folder Comparing Rainfall during the Crop and All Year
        Memo
          The example below shows, for each calendar year, the amount of rain that fell when the crop was in the ground as compared to the annual rainfall. The Report frequency in "ReportInCropAnnually" is {Clock].EndOfYear and the output specifications are:

          		Sum of [Weather].Rain from [Wheat].Sowing
          			to [Wheat].Harvesting as InCropRainfall

          		Sum of [Weather].Rain from 1-Jan to
          			[Clock].Today as AllYearRainfall
      Folder Soil Water storage during the Cropping Phase
        Memo
          The next example also uses outputs from "ReportInCropAnnually" and shows how to get information about soil conditions during the crop. The output specification:

          		Mean of Sum([Soil].SoilWater.SWmm) from [Wheat].Sowing
          			to [Wheat].Harvesting as InCropMeanSoilWater
          gives the whole-soil profile soil water storage as a mean while the crop is in the ground. The output is reported at the end of the year but is for the period from sowing to harvesting only. If the interest is only in the water storage in the top three layers then the specification would be:

          		Mean of Sum([Soil].SoilWater.SWmm[:3]) from [Wheat].Sowing
          			to [Wheat].Harvesting as InCropMeanSoilWaterTopThreeLayers
          and that produces the black line in the figure below. If the interest was in the water storage during the vegetative stages compared to the reproductive stages then:

          		Mean of Sum([Soil].SoilWater.SWmm[:3]) from [Wheat].Sowing
          			to [Wheat].Flowering as VegetativeMeanSoilWaterTopThreeLayers
          and

          		Mean of Sum([Soil].SoilWater.SWmm[:3]) from [Wheat].Flowering
          			to [Wheat].Harvesting as ReproductiveMeanSoilWaterTopThreeLayers
          produce the green and red lines to show that there was less water storage during the reproductive stages. Of course other types of aggregation could be reported such as the difference durign the phases, min/max etc.
      Folder Reporting Yield and When Things Can Seem to Go Wrong
        Memo
          The Report model is a powerful and very useful component to get the information needed from the simulation - but there are some traps that should be noted.

          The example below is primarily based on "ReportInCropAnnually" which has a reporting frequency of [Clock].EndOfYear. That Report uses an output specification of:

          			Max of ([Wheat].Grain.Wt * 10000 / 1000) from [Wheat].Sowing
          				to [Wheat].Harvesting as FinalYield_kg_Ha
          				// * 10000 / 1000 to convert from g/m2 to kg/ha
          (note that the double slash, //, denotes a comment which is shown in green in the user interface). This produces the green line in the figure below. It is immediately noticeable that the yeild in late 1984 was exactly the same as the previous year - this should raise red flags. Alternative outputs that might be expected to give the same values are:

          			Max of ([Wheat].Grain.Wt * 10000 / 1000)
          				from [ReportInCropAnnually].DayAfterLastOutput
          				to [Wheat].Harvesting as FinalYield_kg_Ha_v1
          also at a reporting frequency of [Clock].EndOfYear (the black line), or

          			([Wheat].Grain.Wt * 10000 / 1000) as HarvestedYield_kg_Ha
          with a reporting frequency of [Wheat].Harvesting which produced the orange line (see ReportGrainOnHarvesting), or for more detail report the same output on a daily basis (see ReportGrainDaily) which is the blue line.

          The additional reporting clearly shows that there was no grain yield in 1984 and further investigation (the summary file) shows that there was no crop sown because the sowing conditions were not met. The apparent yield in the green line is not an error in Report but is a result of the specification in combination with the possibility that there will not be a crop every year. When Report does its work at the end of 1984 it outputs the maximum grain yield from the last sowing event to the last harvesting event from the Wheat model - and these were the ones from 1983. This has also affected the green line in Section 5.2.1 and all the lines in 5.2.2 but they were not so immediately obvious. The salient message is to consider the output specifications within the context of the management conditions in the simulation.
  Folder Grouping
    Memo
      Report has the ability to produce temporally aggregated variables grouped by another variable. The example in this section has two contrasting reports that summerise variables seaasonally in 2 different ways.

      1. The first report (SeasonalOverall) temporally aggregates from start to end of simulation and has a reporting frequency of end of simulation. It also has a 'Group By' of [Weather].Season which, at the end of the simulation, will split each variable into values for each season resulting in multpile rows of output, one for each season (4 rows of output).

      2. The second report (SeasonalByYear) has multiple reporting frequencies, one for each end of season. This produces a year x season output table.

      **The group by keyword**

      To use the 'Group By' capability, variables need to be aggregated like this:

      		from [Clock].StartOfSimulation to [Clock].EndOfSimulation

      The reporting frequency must be:

      		[Clock].EndOfSimulation

      The 'Group By' variable can be any APSIM variable e.g.

      		[Clock].Today.Month
      		[Weather].Season

      **The on keyword**

      This simulation also introduces the *on* keyword. This keyword changes the timing of variable collection. By default (as in SeasonalByYear report), the values of variables are collected at the end of each day. When the variable is *[AGPWhiteClover].HarvestedWt* this results in a lot of zeros being collected because HarvestedWt is zero every day except when there is a harvest. This makes the mean calculation very low as it has a lot of zero values for HarvestedWt.

      In the *SeasonalByYearWithOnKeyword* report the *on* keyword is used to specify that the values for HarvestedWt should be collected whenever there is a *[SimpleGrazing].Grazed* event. In other words, a value for HarvestedWt is only collected whenever there is a harvest. Note how the mean values are much higher than the previous report.
    Simulation Seasonal
      Clock: Start=1972-01-01; End=1973-12-31
      Weather: FileName=%root%/Examples/WeatherFiles/NZ_Hamilton.met
      Manager ClimateController
        AllowControl = no
        EnableDate = 05/30/1979 00:00:00
        WithinYearControl = no
        ControlStart = 01-jan
        ControlEnd = 31-dec
        RainfallMultiplier = 0.7791
        RainfallAddition = 0
        RadiationMultiplier = 1
        RadiationAddition = 0
        MinTMultiplier = 0.9484
        MinTAddition = 0
        MaxTMultiplier = 0.9484
        MaxTAddition = 0
        WindMultiplier = 1
        WindAddition = 0
        VPMultiplier = 1
        VPAddition = 0
```csharp
using Newtonsoft.Json;
using APSIM.Shared.Utilities;
using Models.Soils;
using Models.PMF;
using Models.Core;
using System.Xml.Serialization;
using System;
using System.Linq;
using Models.Climate;

namespace Models
{
    [Serializable]
    public class Script : Model
    {
        // - Links to APSIM models
        [Link] Zone zone;
        [Link] Clock Clock;
        [Link] Weather Weather;
        [Link] ISummary summary = null;

        // - Paramters for this manager
        [Description("Enable? Set to 'No' to completely disable this manager")] public yesnoType AllowControl { get; set; }

        [Separator("General settings")]
        [Description("Start the climate controls beginning on date (dd/mmm/yyyy): ")] public DateTime EnableDate { get; set; }
        [Description("Implement climate control only during part of the year?")] public yesnoType WithinYearControl { get; set; }
        [Description("Within each year, the first day to start the climate controls is (dd-mmm)")] public string ControlStart { get; set; }
        [Description("Within each year, end last day of climate control is (dd-mmm)")] public string ControlEnd { get; set; }

        [Separator("Rainfall")]
        [Description("Rainfall multiplier (-): ")] public double RainfallMultiplier { get; set; }
        [Description("Rainfall addition (mm): ")] public double RainfallAddition { get; set; }

        [Separator("Radiation")]
        [Description("Radiation multiplier (-): ")] public double RadiationMultiplier { get; set; }
        [Description("Radiation addition (MJ/m2): ")] public double RadiationAddition { get; set; }

        [Separator("Minimum temperature")]
        [Description("Minimum temperature multiplier (-): ")] public double MinTMultiplier { get; set; }
        [Description("Minimum temperature addition (C): ")] public double MinTAddition { get; set; }

        [Separator("Maximum temperature")]
        [Description("Maximum temperature multiplier (-): ")] public double MaxTMultiplier { get; set; }
        [Description("Maximum temperature addition (C): ")] public double MaxTAddition { get; set; }

        [Separator("Wind speed")]
        [Description("Wind speed multiplier (-): ")] public double WindMultiplier { get; set; }
        [Description("Wind speed addition (m/s): ")] public double WindAddition { get; set; }

        [Separator("Vapour pressure")]
        [Description("Vapour pressure multiplier (-): ")] public double VPMultiplier { get; set; }
        [Description("Vapour pressure addition (hPa): ")] public double VPAddition { get; set; }

        [JsonIgnore] public string Message { get; set; }

        [JsonIgnore] public bool doControl { get; set; }
        [JsonIgnore] public int doControlInt { get; set; }
        //public DateTime ControlStartDate { get; set; }
        //public DateTime ControlEndDate { get; set; }


        [EventSubscribe("StartOfSimulation")] private void OnStartOfSimulation(object sender, EventArgs e)
        {   
            //Set the dates
            //ControlStartDate = DateTime.Parse(ControlStart + "-" + Clock.Today.Year.ToString());
            //ControlEndDate = DateTime.Parse(ControlEnd + "-" + Clock.Today.Year.ToString());
            Message = "";
        }


        [EventSubscribe("PreparingNewWeatherData")] private void OnDoManagement(object sender, EventArgs e)
        {
            // Check if this manager is enabled
            if ((AllowControl == yesnoType.yes) && (Clock.Today >= EnableDate))
            {
                doControl = true;
                if (WithinYearControl == yesnoType.yes)
                    doControl = DateUtilities.WithinDates(ControlStart, Clock.Today, ControlEnd); 
            }

            if (doControl)
                doControlInt = 1;
            else
                doControlInt = 0;

            if (doControl)
            {
                // do the weather alterations 
                Weather.Rain = RainfallMultiplier * Weather.Rain + RainfallAddition;
                Weather.Radn = RadiationMultiplier * Weather.Radn + RadiationAddition;
                Weather.MinT = MinTMultiplier * Weather.MinT + MinTAddition;
                Weather.MaxT = MaxTMultiplier * Weather.MaxT + MaxTAddition;
                Weather.Wind = WindMultiplier * Weather.Wind + WindAddition;
                Weather.VP = VPMultiplier * Weather.VP + VPAddition;
            }
        }

        public enum yesnoType
        {
            /// <summary>a positive answer</summary>
            yes,
            /// <summary>a negative answer</summary>
            no
        }

    }
}
```
      Summary
      SoilArbitrator
      MicroClimate: a_interception=0; b_interception=0; c_interception=0; d_interception=0; SoilHeatFluxFraction=0.4; MinimumHeightDiffForNewLayer=0; NightInterceptionFraction=0.5; ReferenceHeight=2
      Zone Field: Area=1; Slope=0; AspectAngle=0; Altitude=50
        Manager AutomaticIrrigation
          allowIrrigation = False
          seasonStart = 15-Aug
          seasonEnd = 30-May
          seasonsAllocation = 10000
          triggerDeficit = 50
          targetDeficit = 99
          returndays = 1
          maximumAmount = 30
          depthPAWC = 300
          script: same as in More Reporting Examples.Perennial Crop Example.Annual Reporting In June.Field.AutomaticIrrigation
        Operations IrrigationSchedule
        SimpleGrazing: GrazingRotationType=0; SimpleMinGrazable=2000; SimpleGrazingResidual=1000; FlexibleGrazePostDM=0; NoGrazingStartString=01-jun; NoGrazingEndString=15-sep; FractionDefoliatedBiomassToSoil=[1]; FractionDefoliatedNToSoil=[0.25]; FractionExcretedNToDung=[0.6]; DepthUrineIsAdded=250; SendDungElsewhere=0; SendUrineElsewhere=0; UsePatching=false; PseudoPatches=true; ZoneCount=25; UrineReturnPattern=2; PseudoRandomSeed=666; FractionPopulationDecline=0; TramplingOn=false; MaximumPropLitterMovedToSoil=0.1; PastureConsumedAtMaximumRateOfLitterRemoval=1200
          PreGrazeDMArray=[1000, 1000, 1000, 1000, 1000, 1000, 1000, 1000, 1000, 1000, 1000, 1000]
          PostGrazeDMArray=[2000, 2000, 2000, 2000, 2000, 2000, 2000, 2000, 2000, 2000, 2000, 2000]
        Irrigation
        Fertiliser
        SurfaceOrganicMatter: InitialResidueName=Sward; InitialResidueType=grass; InitialResidueMass=1000; InitialStandingFraction=0; InitialCPR=0; InitialCNR=15
        Soil: SoilType=Umbric Andosol (ANu); Country=New Zealan; Latitude=-37.967; Longitude=175.767
          DataSource=Romero, C.C., Hoogenboom, G., Baigorria, G.A., Koo, J., Gijsman, A.J., Wood, S., 2012. Reanalysis of a global soil database for crop and environmental modeling. Environmental Modelling & Software 35, 163-170.  https://harvestchoice.wufoo.com/forms/download-wisol.
          Comments=You will need to add crops to this soil before running simulations.
          Physical
            Thickness  BD    AirDry  LL15   DUL   SAT
            180        0.73  0.05    0.148  0.35  0.656
            120        0.7   0.05    0.147  0.35  0.691
            210        0.69  0.03    0.088  0.25  0.699
            230        0.77  0.03    0.1    0.2   0.672
            SoilCrop AGPRyegrassSoil: LL=[0.14, 0.14, 0.14, 0.14]; KL=[0.1, 0.1, 0.1, 0.02]; XF=[1, 1, 1, 1]
            SoilCrop AGPWhiteCloverSoil: LL=[0.14, 0.14, 0.14, 0.14]; KL=[0.1, 0.1, 0.1, 0.02]; XF=[1, 1, 1, 1]
          WaterBalance SoilWater: SummerDate=1-Nov; SummerU=9.12; SummerCona=3; WinterDate=1-Apr; WinterU=9.12; WinterCona=3; DiffusConst=0; DiffusSlope=0; Salb=0.13; CN2Bare=73; CNRed=0; CNCov=0; PSIDul=-100; Thickness=[180, 120, 210, 230]; SWCON=[0.5, 0.5, 0.5, 0.7]
          Nutrient
          Organic: FOMCNRatio=0; CarbonUnits=Total
            Thickness  Carbon  SoilCNRatio  FBiom  FInert  FOM
            180        7.9     11.01        0.02   0.26    0
            120        2       11.01        0.02   1       0
            210        1       11.01        0.02   1       0
            230        0.5     11.01        0.01   1       0
          Chemical: Thickness=[180, 120, 210, 230]; PH=[5.6, 6.2, 6.2, 6.4]; PHUnits=Water
          Water: Thickness=[180, 120, 210, 230]; InitialValues=[0.35, 0.35, 0.25, 0.2]; FilledFromTop=true
          Solute NO3: Thickness=[180, 120, 210, 230]; InitialValues=[0.1, 0.1, 0.1, 0.1]; InitialValuesUnits=ppm; WaterTableConcentration=0; D0=0; DepthConstant=0; MaxDepthSoluteAccessible=0; RunoffEffectivenessAtMovingSolute=0; MaxEffectiveRunoff=0
          Solute NH4: same as Grouping.Seasonal.Field.Soil.NO3
          Solute Urea: Thickness=[180, 120, 210, 230]; InitialValues=[0, 0, 0, 0]; InitialValuesUnits=ppm; WaterTableConcentration=0; D0=0; DepthConstant=0; MaxDepthSoluteAccessible=0; RunoffEffectivenessAtMovingSolute=0; MaxEffectiveRunoff=0
          SoilTemperature Temperature
        PastureSpecies AGPRyegrass: same as More Reporting Examples.Perennial Crop Example.Annual Reporting In June.Field.AGPRyegrass
        PastureSpecies AGPWhiteClover: same as More Reporting Examples.Perennial Crop Example.Annual Reporting In June.Field.AGPWhiteClover
        Report SeasonalOverall: EventNames=[Clock].EndOfSimulation; GroupByVariableName=[Weather].Season
          VariableNames:
            [Weather].Season as Season
            sum of [AGPWhiteClover].HarvestedWt from [Clock].StartOfSimulation to [Clock].EndOfSimulation as WhiteClover
            sum of [AGPRyegrass].HarvestedWt from [Clock].StartOfSimulation to [Clock].EndOfSimulation as Ryegrass
            mean of ([AGPWhiteClover].AboveGroundWt / ([AGPWhiteClover].AboveGroundWt + [AGPRyegrass].AboveGroundWt + 1.0)) from [Clock].StartOfSimulation to [Clock].EndOfSimulation as PropCloverHarvested
        Report SeasonalByYear
          VariableNames:
            [Clock].Today.Year
            [Weather].Season as Season
            sum of [AGPWhiteClover].HarvestedWt from [SeasonalByYear].DayAfterLastOutput to [Clock].Today as WhiteClover
            sum of [AGPRyegrass].HarvestedWt from [SeasonalByYear].DayAfterLastOutput to [Clock].Today as Ryegrass
            mean of ([AGPWhiteClover].HarvestedWt / ([AGPWhiteClover].HarvestedWt + [AGPRyegrass].HarvestedWt + 1.0)) from [SeasonalByYear].DayAfterLastOutput to [Clock].Today as PropCloverHarvested
          EventNames:
            [Weather].EndOfAutumn
            [Weather].EndOfWinter
            [Weather].EndOfSpring
            [Weather].EndOfSummer
        Report SeasonalByYearWithOnKeyword
          VariableNames:
            [Clock].Today.Year
            [Weather].Season as Season
            sum of [AGPWhiteClover].HarvestedWt from [SeasonalByYear].DayAfterLastOutput to [Clock].Today as WhiteClover
            sum of [AGPRyegrass].HarvestedWt from [SeasonalByYear].DayAfterLastOutput to [Clock].Today as Ryegrass
            mean of ([AGPWhiteClover].HarvestedWt / ([AGPWhiteClover].HarvestedWt + [AGPRyegrass].HarvestedWt + 1.0)) on [SimpleGrazing].Grazed from [SeasonalByYear].DayAfterLastOutput to [Clock].Today as PropCloverHarvested
          EventNames:
            [Weather].EndOfAutumn
            [Weather].EndOfWinter
            [Weather].EndOfSpring
            [Weather].EndOfSummer
      Forages
        Parameters:
          Name                          LiveDigestibility  DeadDigestibility  LiveFractionConsumable  DeadFractionConsumable  LiveMinimumBiomass  DeadMinimumBiomass
          SurfaceOrganicMatter.Residue  0.7                0.3                1                       1                       100                 0
          AGPRyegrass.Leaf              FromModel          FromModel          1                       1                       100                 0
          AGPRyegrass.Stem              FromModel          FromModel          1                       1                       100                 0
          AGPRyegrass.Stolon            FromModel          FromModel          1                       1                       100                 0
          AGPWhiteClover.Leaf           FromModel          FromModel          1                       1                       100                 0
          AGPWhiteClover.Stem           FromModel          FromModel          1                       1                       100                 0
          AGPWhiteClover.Stolon         FromModel          FromModel          1                       1                       100                 0
          SurfaceOrganicMatter.Residue  0.7                0.3                1                       1                       100                 0
          AGPRyegrass.Leaf              FromModel          FromModel          1                       1                       100                 0
          AGPRyegrass.Stem              FromModel          FromModel          1                       1                       100                 0
          AGPRyegrass.Stolon            FromModel          FromModel          1                       1                       100                 0
          AGPWhiteClover.Leaf           FromModel          FromModel          1                       1                       100                 0
          AGPWhiteClover.Stem           FromModel          FromModel          1                       1                       100                 0
          AGPWhiteClover.Stolon         FromModel          FromModel          1                       1                       100                 0
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