Simulations: Version=206
  Memo Instructions
    This file contains a series of simulations that gradualy increase in complexity, demonstrating the diffent ways the SCRUM model can be used in simulations.
    Work your way through each simulatoin from top to bottom, read the "Description Memo" in each simulation for further information.   Try making small changes to the parameters on the SCRUMCropInstance and Manager models and see how they change simulation results.
  DataStore
  Simulation SingleCrop
    Memo Description
      This example runs scrum in the simplest way.   The necessary components in the "Field" are:
      * A PMF configured model called __"SCRUM"__
      	* This provides the generic crop model mechanisum but has no setable components.
      	* Right click the SCRUM model and select "Show Model Structure"  This allows you to review the structure and coefficient values of the SCRUM model.  Note that any parameters with a "Parameters set at establishment" memo on them are not defined in the models configuration.  Instead they set by the user in a SCRUMCropInstance.
      * A SCRUMCropInstance, named __"exampleSCRUMCropInstance"__.
      	* This is where parameters are set to represent specific Crops/Cultivars.
      	* Parameter values from this instance are set into the SCRUM model when it is established giving freedom (and responsibility) to the user to customise crops.
      * A manager model called __"EstablishCropInstance"__ that does the equivlent job to sowing for other crop models.  The main components of this scrip are:
      	* The first line of script reproduced below (about line 120) links the "currentCrop" to the SCRUMCropInstance named "exampleScrumCropInstance"
      	* the next line (about lin 121) instructs the currentCrop to establish and passes in __"management"__ parameters
      		* Line 121 sits inside an if statement that is only entered on the __"Establishment date"__ set on the properties tab
      		* __"management"__ parameters is a data class that contains all the parameters set on the parameters tab of this script
      		* A key feature of SCRUM is that we specify the potential yield and harvest date (or Tt to harvest) when the crop is established
      ~~~
      ScrumCropInstance currentCrop =   Structure.FindChild<ScrumCropInstance>("exampleScrumCropInstance", recurse: true, relativeTo: (INodeModel)zone);
      currentCrop.Establish(management);
      ~~~

      There is an important consideraction for Soil.Physical.SCRUMSoil.kl parameter when using SCRUM.  __Simulations do not respond to kl values set under the physical node__.  This is because SCRUM can represent different crops with a wide range of root characteristics in the same simulation.  As such it is not appropriate to have a single set of KL values for all SCRUMCropInstances.  Instead we set the KL in the top soil and the maximum rooting depth for each SCRUMCropInstance.  The SCRUM model then sets its KL in the soil assuming an exponential decline from the specified value in the top layer to zero below maximum rooting depth.
    Weather: FileName=%root%/Examples/WeatherFiles/NZ_Lincoln.met
    Clock: Start=2000-07-01; End=2001-06-30
    Summary
    SoilArbitrator Soil Arbitrator
    Zone Field: Area=1; Slope=0; AspectAngle=0; Altitude=50
      Plant SCRUM
      ScrumCropInstance exampleScrumCropInstance: HarvestIndex=0.45; MoistureContent=0.14; RootProportion=0.1; MaxRootDepth=1005; SurfaceKL=0.1; MaxHeight=700; MaxCover=0.97; ExtinctionCoefficient=0.55; TypicalHarvestStage=Ripe; SeedlingNConc=0.05; ProductHarvestNConc=0.015; StoverHarvestNConc=0.01; RootNConc=0.01; LegumeFactor=0; BaseTemperature=0; OptimumTemperature=30; MaxTemperature=40; Tt_SowToEmergence=100; GSMax=0.008; R50=150; ConsiderWaterStress=true
      Manager EstablishCropInstance
        EstablishDate = 09/01/2000 00:00:00
        EstablishStage = Seed
        PlantingDepth = 15
        HarvestTimeOption = SettingDate
        HarvestDate = 02/15/2001 00:00:00
        Tt_EstablishToHarvest = 1500
        HarvestStage = Maturity
        ExpectedYield = 8
        FieldLoss = 0
        ResidueRemoval = 0
        ResidueIncorporation = 1
        ResidueIncorporationDepth = 150
```csharp
using APSIM.Core;
using Models.Utilities;
using Models.PMF.SimplePlantModels;
using Models.PMF;
using Models.Soils;
using Models.Core;
using APSIM.Shared.Utilities;
using System.Linq;
using System;

namespace Models
{
    [Serializable]
    public class Script : Model, IStructureDependency
    {
        [Link] private Clock clock;
        [Link] private Zone zone;
        [Link(Type = LinkType.Scoped, ByName = true)]
        public Plant scrum;
        private ScrumManagementInstance management;
        
        public IStructure Structure { private get; set; }

        [Separator("Specify establishment and harvest conditions for this crop")]

        /// <summary>Date to establishment the crop</summary>
        [Description("Establishment date:")]
        public DateTime EstablishDate { get; set; }

        /// <summary>Stages at which the SCRUM is established</summary>
        [Description("Choose the establishment stage")]
        [Display(Type = DisplayType.ScrumEstablishStages)]
        public string EstablishStage {get; set;}

        /// <summary>Depth at which the crop/seeds are planted.</summary>
        [Description("Planting depth (mm):")]
        public double PlantingDepth { get; set; }

        /// <summary>Choice on how the duration of crop is defined</summary>
        [Description("Choose how the crop cycle is defined:")]
        public HarvestTimingOption HarvestTimeOption {get; set;}

        private bool isHarvestDateDefined { get { return HarvestTimeOption == HarvestTimingOption.SettingDate; } }
        private bool isThermalTimeDefined { get { return HarvestTimeOption == HarvestTimingOption.SettingThermalTime; } }

        /// <summary>Date to establishment the crop</summary>
        [Description("Harvest date (dd/mm/yyyy):")]
        [Display(VisibleCallback = "isHarvestDateDefined")]
        public DateTime HarvestDate { get; set; }

        /// <summary>Thermal time from establishment to harvest (if blank or zero must specify harvest date)</summary>
        [Description("Thermal time from establishment to harvest (oCd):")]
        [Display(VisibleCallback = "isThermalTimeDefined")]
        public double Tt_EstablishToHarvest { get; set; }

        /// <summary>Stage at which the crop is to be harvested at</summary>
        [Description("Choose the stage to harvest the crop:")]
        [Display(Type = DisplayType.ScrumHarvestStages)]
        public string HarvestStage {get; set;}

        [Separator("Specify an appropriate potential yield for the crop (based on assumed genotype, sowing date, and local conditions)\n" +
                   "  *SCRUM will reduce yield if water or N stress are predicted")]

        /// <summary>Expected crop yield (t FW/ha)</summary>
        [Description("Potential crop yield, fresh weight (t/ha)")]
        public double ExpectedYield {get; set;}

        [Separator("Specify proportions of field loss and residue removal at harvest")]

        /// <summary>Proportion of product that is left in the field at harvest (due to disease, market, ect.)</summary>
        [Description("Proportion of product lost in the field at harvest (0-1):")]
        public double FieldLoss { get; set; }

        /// <summary>Proportion of stover that is removed from the field at harvest (e.g., bailing)</summary>
        [Description("Proportion of stover removed from the field at harvest (0-1):")]
        public double ResidueRemoval { get; set; }

        /// <summaryProportion of residues that is incorporated by cultivation after harvest</summary>
        [Description("Proportion of residue incorporated to soil at harvest (0-1):")]
        public double ResidueIncorporation { get; set; }

        /// <summary>Depth down to which the residues that are incorporated to by cultivation after harvest</summary>
        [Description("Depth to incorporate residues (mm):")]
        public double ResidueIncorporationDepth { get; set; }



        [EventSubscribe("DoManagement")]
        private void OnDoManagement(object sender, EventArgs e)
        {
            if (DateTime.Compare(clock.Today, EstablishDate) == 0)
                    {
                        if (isHarvestDateDefined && (HarvestDate <= clock.Today))
                        {
                            throw new Exception("Harvest date is earlier than establishment date");
                        }

                        management = new ScrumManagementInstance(cropName: "exampleScrumCropInstance",
                                                                 establishDate: clock.Today,
                                                                 establishStage: EstablishStage,
                                                                 plantingDepth: PlantingDepth,
                                                                 harvestStage: HarvestStage,
                                                                 expectedYield: ExpectedYield,
                                                                 harvestDate: isHarvestDateDefined? HarvestDate : null,
                                                                 ttEstablishmentToHarvest: isThermalTimeDefined? Tt_EstablishToHarvest: double.NaN,
                                                                 fieldLoss: FieldLoss,
                                                                 residueRemoval: ResidueRemoval,
                                                                 residueIncorporation: ResidueIncorporation,
                                                                 residueIncorporationDepth: ResidueIncorporationDepth);
                        ScrumCropInstance currentCrop =   Structure.FindChild<ScrumCropInstance>("exampleScrumCropInstance", recurse: true, relativeTo: (INodeModel)zone);
                        currentCrop.Establish(management);
                    }
        }

        /// <summary>Flag how harvest time is defined.</summary>
        public enum HarvestTimingOption
        {
            /// <summary>A date is to be used.</summary>
            SettingDate,
            /// <summary>A given thermal time sum is to be used.</summary>
            SettingThermalTime
        }
    }
}
```
      Soil: Latitude=0; Longitude=0
        Chemical: PHUnits=Water
          Thickness  PH   CEC
          100        6.6  12.44
          200        6.2  11.6525
          300        5.7  11.045
          300        5.5  10.6625
          300        5.5  9.4025
          300        5.5  9.4025
          CEC source: Calculated
        Water: Thickness=[100, 200, 300, 300, 300, 300]; InitialValues=[0.33, 0.33, 0.31, 0.15, 0.1, 0.06]; FilledFromTop=false
        Physical
          Thickness  ParticleSizeSand  ParticleSizeSilt  ParticleSizeClay  Rocks     BD   AirDry  LL15  DUL   SAT
          100        5                 65                30                0         1.2  0.08    0.13  0.33  0.5
          200        5                 65                30                0         1.2  0.13    0.13  0.33  0.5
          300        5                 65                30                0.135336  1.2  0.1     0.1   0.31  0.44
          300        5                 65                30                0         1.2  0.06    0.06  0.15  0.46
          300        5                 65                30                0.135336  1.2  0.04    0.04  0.1   0.44
          300        5                 65                30                0.135336  1.2  0.02    0.02  0.06  0.44
          Rocks, ParticleSizeSand, ParticleSizeSilt, ParticleSizeClay source: Calculated
          SoilCrop SCRUMSoil: LL=[0.13, 0.13, 0.1, 0.06, 0.04, 0.02]; KL=[0.1, 0.1, 0.1, 0.1, 0.1, 0.1]; XF=[1, 1, 1, 1, 1, 1]
        WaterBalance SoilWater: SummerDate=1-Nov; SummerU=9; SummerCona=4.4; WinterDate=1-Apr; WinterU=9; WinterCona=4.4; DiffusConst=88; DiffusSlope=35.4; Salb=0.18; CN2Bare=68; CNRed=20; CNCov=0.8; DischargeWidth=0; CatchmentArea=0; PSIDul=-100
          Thickness  SWCON  KLAT
          100        0.55   0
          200        0.55   0
          300        0.55   0
          300        0.55   0
          300        0.55   0
          300        0.55   0
        Nutrient
        Organic: FOMCNRatio=30; CarbonUnits=Total
          Thickness  Carbon  SoilCNRatio  FBiom  FInert  FOM
          100        1.82    11.5         0.025  0.3     1243.93
          200        1.47    11.5         0.025  0.4     833.832
          300        1.2     11.5         0.015  0.75    457.617
          300        1.03    11.5         0.01   0.9     251.145
          300        0.47    11.5         0.01   0.96    137.831
          300        0.47    11.5         0.01   0.96    75.6435
        LayerStructure
          Thickness=[100, 100, 100, 100, 100, 100, 100, 100, 100, 100, 100, 100, 100, 100, 100]
        Solute NO3: Thickness=[100, 200, 300, 300, 300, 300]; InitialValues=[225, 12.5, 1.38889, 1.38889, 0, 0]; InitialValuesUnits=ppm; WaterTableConcentration=0; D0=0; DepthConstant=0; MaxDepthSoluteAccessible=0; RunoffEffectivenessAtMovingSolute=0; MaxEffectiveRunoff=0
        Solute NH4: Thickness=[100, 200, 300, 300, 300, 300]; InitialValues=[0, 0, 0, 0, 0, 0]; InitialValuesUnits=ppm; WaterTableConcentration=0; D0=0; DepthConstant=0; MaxDepthSoluteAccessible=0; RunoffEffectivenessAtMovingSolute=0; MaxEffectiveRunoff=0
        Solute Urea: Thickness=[100, 200, 300, 300, 300, 300]; InitialValues=[0, 0, 0, 0, 0, 0]; InitialValuesUnits=kg/ha; WaterTableConcentration=0; D0=0; DepthConstant=0; MaxDepthSoluteAccessible=0; RunoffEffectivenessAtMovingSolute=0; MaxEffectiveRunoff=0
        SoilTemperature Temperature
      SurfaceOrganicMatter: InitialResidueName=wheat; InitialResidueType=wheat; InitialResidueMass=2000; InitialStandingFraction=0; InitialCPR=0; InitialCNR=80
      MicroClimate: a_interception=0; b_interception=1; c_interception=0; d_interception=0; SoilHeatFluxFraction=0.4; MinimumHeightDiffForNewLayer=0; NightInterceptionFraction=0.5; ReferenceHeight=2
      Irrigation
      Fertiliser
      Manager AutomaticIrrigation
        IrrigationIsEnabled = True
        SeasonStartDate = 1-Sep
        SeasonEndDate = 30-Apr
        OnlyApplyOntoCrop = True
        SeasonsAllocation = 1000
        TriggerFraction = 0.8
        RefillFraction = 0.95
        MaximumIrrigationAmount = 40
        ReturnDays = 3
        DepthToMonitor = 600
        LimitMonitoringDepth = True
```csharp
// This script can be used to apply irrigation automatically, based soil water status
// Blame to RCichota, last updated in 18/Mar/2025

using System;
using System.Xml.Serialization;
using Newtonsoft.Json;
using APSIM.Shared.Utilities;
using Models.Core;
using Models.Soils;
using Models.PMF;
using Models.Interfaces;
using Models.Soils.Nutrients;

namespace Models
{
    [Serializable]
    [System.Xml.Serialization.XmlInclude(typeof(Model))]
    public class Script : Model
    {
        //Communication to other modules
        [Link] private Clock clock;
        [Link] private ISummary summary;
        [Link] private IPhysical soilPhysical;
        [Link] private ISoilWater waterBalance;
        [Link] private Irrigation Irrigation;
        [Link] private Plant SCRUM;

        //User inputs from properties tab
        [Separator("Generic irrigation management")]
        [Description(" Enable automatic irrigation management?              ")]
        public bool IrrigationIsEnabled {get; set;}

        [Description(" Date to start the irrigation season (dd-mmm):")]
        [Display(VisibleCallback = "IrrigationIsEnabled")]
        public string SeasonStartDate {get; set;}

        [Description(" Date to end the irrigation season (dd-mmm):")]
        [Display(VisibleCallback = "IrrigationIsEnabled")]
        public string SeasonEndDate {get; set;}

        [Description(" Only irrigate if there is a crop on the field?")]
        [Display(VisibleCallback = "IrrigationIsEnabled")]
        public bool OnlyApplyOntoCrop {get; set;}

        [Description(" Season allocation (mm):")]
        [Display(VisibleCallback = "IrrigationIsEnabled")]
        public double SeasonsAllocation {get; set;}

        [Description(" Fraction of PAWC to trigger irrigation (0-1):")]
        [Display(VisibleCallback = "IrrigationIsEnabled")]
        public double TriggerFraction {get; set;}

        [Description(" Fraction of PAWC to refill soil to (0-1):")]
        [Display(VisibleCallback = "IrrigationIsEnabled")]
        public double RefillFraction {get; set;}

        [Description(" Maximum irrigation amount per application (mm):")]
        [Display(VisibleCallback = "IrrigationIsEnabled")]
        public double MaximumIrrigationAmount {get; set;}

        [Description(" Minimum number of days between irrigations:")]
        [Display(VisibleCallback = "IrrigationIsEnabled")]
        public double ReturnDays {get; set;}

        [Description(" Depth to calculate PAWC (mm):")]
        [Display(VisibleCallback = "IrrigationIsEnabled")]
        public double DepthToMonitor {get; set;}

        [Description(" Limit the depth to the rooting depth?")]
        [Display(VisibleCallback = "IrrigOnAndOnlyOnCrops")]
        public bool LimitMonitoringDepth {get; set;}

        //Class members
        [JsonIgnore] public bool SeasonIsOpen {get; set;}
        [JsonIgnore] private bool CropIsActive {get; set;}
        [JsonIgnore] private bool IrrigatorIsAvailable {get; set;}
        [JsonIgnore] private bool SoilIsDry {get; set;}
        [JsonIgnore] private bool WaterIsAvailable {get; set;}

        [JsonIgnore] public double MonitoredLayerTrigger {get; set;}
        [JsonIgnore] public double MonitoredLayerTarget {get; set;}
        [JsonIgnore] public double MonitoredLayerDUL {get; set;}
        [JsonIgnore] public double MonitoredLayerLL {get; set;}
        [JsonIgnore] public double MonitoredLayerSW {get; set;}
        [JsonIgnore] public double MonitoredLayerPAWC {get; set;}
        [JsonIgnore] public double MonitoredLayerPAW {get; set;}
        [JsonIgnore] public double MonitoredDepth {get; set;}

        [JsonIgnore] public double AmountToApply {get; set;}
        [JsonIgnore] public double SeasonAppliedAmount {get; set;}
        [JsonIgnore] public double DaysSinceLastApplication {get; set;}

        //Internal Variables
        private bool IrrigOnAndOnlyOnCrops
        { get {return IrrigationIsEnabled && OnlyApplyOntoCrop; }}
        private double lastLayerFraction;
        private int lastLayer;


        [EventSubscribe("StartOfSimulation")]
        private void OnStartOfSimulation(object sender, EventArgs e)
        {
            // initialise some variables
            DaysSinceLastApplication = ReturnDays;
            if (!OnlyApplyOntoCrop)
            {
                LimitMonitoringDepth = false;
            }

            // calculate soil water variables
            calculateWaterThresholds(DepthToMonitor);
            MonitoredLayerTrigger = MonitoredLayerLL + MonitoredLayerPAWC*TriggerFraction;
            MonitoredLayerTarget = MonitoredLayerLL + MonitoredLayerPAWC*RefillFraction;
            MonitoredDepth = DepthToMonitor;
        }

        [EventSubscribe("StartOfDay")]
        private void OnStartOfDay(object sender, EventArgs e)
        {
            // check whether we are starting a new season, zero amount
            if (DateUtilities.DatesAreEqual(SeasonStartDate, clock.Today))
            {
                SeasonAppliedAmount = 0.0;
            }
        }

        [EventSubscribe("DoManagement")]
        private void OnDoManagement(object sender, EventArgs e)
        {
            // get the current amount of water in the soil
            if (LimitMonitoringDepth)
            { // get the current rooting depth, no less than 50mm, no more than DepthToMonitor
                MonitoredDepth = DepthToMonitor;
                if (SCRUM.IsAlive)
                {
                    MonitoredDepth = Math.Min(DepthToMonitor, Math.Max(50.0, SCRUM.Root.Depth));
                }

                // re-calculate the soil water variables
                calculateWaterThresholds(MonitoredDepth);
                MonitoredLayerTrigger = MonitoredLayerLL + MonitoredLayerPAWC*TriggerFraction;
                MonitoredLayerTarget = MonitoredLayerLL + MonitoredLayerPAWC*RefillFraction;
            }

            calculateSoilWater(MonitoredDepth);

            // check water status and management conditions, if we can irrigate at all
            if (IrrigationIsEnabled)
            {
                DaysSinceLastApplication += 1;

                // are we within the irrigation season?
                SeasonIsOpen = false;
                if (DateUtilities.WithinDates(SeasonStartDate, clock.Today, SeasonEndDate))
                {
                    SeasonIsOpen = true;
                }

                // is there a crop in the ground that needs irrigation?
                CropIsActive = true;
                if (OnlyApplyOntoCrop)
                {
                    CropIsActive = false;
                    if (SCRUM.IsAlive)
                    {
                        CropIsActive = true;
                    }
                }

                // is the irrigator available?
                IrrigatorIsAvailable = false;
                if (DaysSinceLastApplication >= ReturnDays)
                {
                    IrrigatorIsAvailable = true;
                }

                // is the soil dry enough to require irrigation?
                SoilIsDry = false;
                if (MonitoredLayerSW <= MonitoredLayerTrigger)
                {
                    SoilIsDry = true;
                }

                // is there water available, within allocation?
                WaterIsAvailable = false;
                if (SeasonAppliedAmount < SeasonsAllocation)
                {
                    WaterIsAvailable = true;
                }

                //Lets bloody well irrigate then!!!!
                if (SeasonIsOpen && CropIsActive && IrrigatorIsAvailable && SoilIsDry && WaterIsAvailable)
                {
                    AmountToApply = MonitoredLayerTarget - MonitoredLayerSW;
                    AmountToApply = Math.Min(AmountToApply, MaximumIrrigationAmount);
                    AmountToApply = Math.Min(AmountToApply, SeasonsAllocation - SeasonAppliedAmount);
                    AmountToApply = Math.Max(AmountToApply, 0.0);
                    Irrigation.Apply(amount: AmountToApply, depth: 0.0);
                    DaysSinceLastApplication = 0;
                    SeasonAppliedAmount += AmountToApply;
                    summary.WriteMessage(this, "Automatic irrigation  applied, " + AmountToApply.ToString("#0.0") + " mm", MessageType.Diagnostic);
                }
            }
        }

        // computes the water thresholds in the soil down to a given depth
        private void calculateWaterThresholds(double depthToCalculate)
        {
            MonitoredLayerLL = 0.0;
            MonitoredLayerDUL = 0.0;
            double accumulatedDepth = 0.0;
            lastLayerFraction = 0.0;
            lastLayer = 0;
            for (int layer = 0; accumulatedDepth <= depthToCalculate; layer++)
            {
                double layerFraction = (depthToCalculate - accumulatedDepth)/soilPhysical.Thickness[layer];
                layerFraction = Math.Min(1.0, Math.Max(0.0, layerFraction));
                MonitoredLayerLL += soilPhysical.LL15mm[layer]*layerFraction;
                MonitoredLayerDUL += soilPhysical.DULmm[layer]*layerFraction;
                accumulatedDepth += soilPhysical.Thickness[layer];
                if (accumulatedDepth >= depthToCalculate)
                {
                    lastLayerFraction = layerFraction;
                    lastLayer = layer;
                }
            }

            MonitoredLayerPAWC = MonitoredLayerDUL - MonitoredLayerLL;
        }

        // computes the amount of water in the soil down to a given depth
        private void calculateSoilWater(double depthToCalculate)
        {
            MonitoredLayerSW = 0.0;
            double accumulatedDepth = 0.0;
            for (int layer = 0; accumulatedDepth <= depthToCalculate; layer++)
            {
                if (layer < lastLayer)
                {
                    MonitoredLayerSW += waterBalance.SWmm[layer];
                }
                else
                {
                    MonitoredLayerSW += waterBalance.SWmm[layer]*lastLayerFraction;
                }

                accumulatedDepth += soilPhysical.Thickness[layer];
            }

            MonitoredLayerPAW = Math.Max(0.0, MonitoredLayerSW - MonitoredLayerLL);
        }
    }
}
```
      Manager AutomaticFertiliser
        FertiliserIsEnabled = True
        SeasonStartDate = 1-Aug
        SeasonEndDate = 30-Apr
        OnlyApplyOntoCrop = False
        SeasonsAllocation = 1000
        TriggerSoilN = 50
        AmountToApply = 25
        FertiliserType = UreaN
        ReturnDays = 3
        DepthToMonitor = 300
        LimitMonitoringDepth = False
```csharp
// This script can be used to apply N fertiliser automatically, based soil mineral N status
// Blame to RCichota, last updated in 18/Mar/2025

using System;
using System.Xml.Serialization;
using Newtonsoft.Json;
using APSIM.Shared.Utilities;
using Models.Core;
using Models.Soils;
using Models.PMF;
using Models.Interfaces;
using Models.Soils.Nutrients;

namespace Models
{
    [Serializable]
    [System.Xml.Serialization.XmlInclude(typeof(Model))]
    public class Script : Model
    {
        //Communication to other modules
        [Link] private Clock clock;
        [Link] private ISummary summary;
        [Link] private IPhysical soilPhysical;
        [Link] private INutrient soilNutrient;
        [Link] private Fertiliser Fertiliser;
        [Link] private Plant SCRUM;

        //User inputs from properties tab
        [Separator("Generic N fertiliser management")]
        [Description(" Enable automatic fertiliser management?                           ")]
        public bool FertiliserIsEnabled {get; set;}

        [Description(" Date to start the fertiliser season (dd-mmm):")]
        [Display(VisibleCallback = "FertiliserIsEnabled")]
        public string SeasonStartDate {get; set;}

        [Description(" Date to end the fertiliser season (dd-mmm):")]
        [Display(VisibleCallback = "FertiliserIsEnabled")]
        public string SeasonEndDate {get; set;}

        [Description(" Only fertilise if there is a crop on the field?")]
        [Display(VisibleCallback = "FertiliserIsEnabled")]
        public bool OnlyApplyOntoCrop {get; set;}

        [Description(" Season allocation (kg N/ha):")]
        [Display(VisibleCallback = "FertiliserIsEnabled")]
        public double SeasonsAllocation {get; set;}

        [Description(" Minimum soil mineral N, trigger an application (kg N/ha):")]
        [Display(VisibleCallback = "FertiliserIsEnabled")]
        public double TriggerSoilN {get; set;}

        [Description(" Fertiliser N amount per application (kg N/ha):")]
        [Display(VisibleCallback = "FertiliserIsEnabled")]
        public double AmountToApply {get; set;}

        [Description(" Type of fertiliser to apply:")]
        [Display(VisibleCallback = "FertiliserIsEnabled", Type = DisplayType.FertiliserType)]
        public string FertiliserType { get; set; }

        [Description(" Minimum number of days between applications:")]
        [Display(VisibleCallback = "FertiliserIsEnabled")]
        public double ReturnDays {get; set;}

        [Description(" Depth to calculate soil mineral N (mm):")]
        [Display(VisibleCallback = "FertiliserIsEnabled")]
        public double DepthToMonitor {get; set;}

        [Description(" Limit the depth to the rooting depth?")]
        [Display(VisibleCallback = "FertOnAndOnlyOnCrops")]
        public bool LimitMonitoringDepth {get; set;}

        //Class members
        [JsonIgnore] public bool SeasonIsOpen {get; set;}
        [JsonIgnore] private bool CropIsActive {get; set;}
        [JsonIgnore] private bool SpreaderIsAvailable {get; set;}
        [JsonIgnore] private bool SoilNitrogenIsLow {get; set;}
        [JsonIgnore] private bool FertiliserIsAvailable {get; set;}

        [JsonIgnore] public double MonitoredLayerSoilN {get; set;}
        [JsonIgnore] public double MonitoredDepth {get; set;}

        [JsonIgnore] public double SeasonAppliedAmount {get; set;}
        [JsonIgnore] public double DaysSinceLastApplication {get; set;}

        //Internal Variables
        private bool FertOnAndOnlyOnCrops
        { get {return FertiliserIsEnabled && OnlyApplyOntoCrop; }}


        [EventSubscribe("StartOfSimulation")]
        private void OnStartOfSimulation(object sender, EventArgs e)
        {
            // initialise some variables
            DaysSinceLastApplication = ReturnDays;
            if (!OnlyApplyOntoCrop)
            {
                LimitMonitoringDepth = false;
            }

            MonitoredDepth = DepthToMonitor;
        }

        [EventSubscribe("StartOfDay")]
        private void OnStartOfDay(object sender, EventArgs e)
        {
            // check whether we are starting a new season, zero amount
            if (DateUtilities.DatesAreEqual(SeasonStartDate, clock.Today))
            {
                SeasonAppliedAmount = 0.0;
            }
        }

        [EventSubscribe("DoManagement")]
        private void OnDoManagement(object sender, EventArgs e)
        {
            // get the current amount of nitrogen in the soil
            if (LimitMonitoringDepth)
            { // get the current rooting depth, no less than 50mm, no more than DepthToMonitor
                MonitoredDepth = DepthToMonitor;
                if (SCRUM.IsAlive)
                {
                    MonitoredDepth = Math.Min(DepthToMonitor, Math.Max(50.0, SCRUM.Root.Depth));
                }
            }

            calculateSoilMineralNitrogen(MonitoredDepth);

            // check N status and management conditions, if we can fertilise at all
            if (FertiliserIsEnabled)
            {
                DaysSinceLastApplication += 1;

                // are we within the irrigation season?
                SeasonIsOpen = false;
                if (DateUtilities.WithinDates(SeasonStartDate, clock.Today, SeasonEndDate))
                {
                    SeasonIsOpen = true;
                }

                // is there a crop in the ground that needs fertiliser?
                CropIsActive = true;
                if (OnlyApplyOntoCrop)
                {
                    CropIsActive = false;
                    if (SCRUM.IsAlive)
                    {
                        CropIsActive = true;
                    }
                }

                // is the spreader available?
                SpreaderIsAvailable = false;
                if (DaysSinceLastApplication >= ReturnDays)
                {
                    SpreaderIsAvailable = true;
                }

                // is the soil N low enough to require fertiliser?
                SoilNitrogenIsLow = false;
                if (MonitoredLayerSoilN <= TriggerSoilN)
                {
                    SoilNitrogenIsLow = true;
                }

                // is there N fertiliser available, within allocation?
                FertiliserIsAvailable = false;
                if (SeasonAppliedAmount < SeasonsAllocation)
                {
                    FertiliserIsAvailable = true;
                }

                //Lets bloody well fertilise then!!!!
                if (SeasonIsOpen && CropIsActive && SpreaderIsAvailable && SoilNitrogenIsLow && FertiliserIsAvailable)
                {
                    AmountToApply = Math.Min(AmountToApply, SeasonsAllocation - SeasonAppliedAmount);
                    AmountToApply = Math.Max(AmountToApply, 0.0);
                    Fertiliser.Apply(amount: AmountToApply, type: FertiliserType, depth: 10.0);
                    DaysSinceLastApplication = 0;
                    SeasonAppliedAmount += AmountToApply;
                    summary.WriteMessage(this, "Automatic N fertiliser applied, " + AmountToApply.ToString("#0.0") + " kgN/ha", MessageType.Diagnostic);
                }
            }
        }

        // computes the amount of mineral N in the soil down to a given depth
        private void calculateSoilMineralNitrogen(double depthToCalculate)
        {
            MonitoredLayerSoilN = 0.0;
            double accumulatedDepth = 0.0;
            for (int layer = 0; accumulatedDepth <= depthToCalculate; layer++)
            {
                double layerFraction = (depthToCalculate - accumulatedDepth)/soilPhysical.Thickness[layer];
                layerFraction = Math.Min(1.0, Math.Max(0.0, layerFraction));
                MonitoredLayerSoilN += (soilNutrient.MineralN[layer])*layerFraction;
                accumulatedDepth += soilPhysical.Thickness[layer];
            }
        }
    }
}
```
      Report: EventNames=[Clock].DoReport
        VariableNames:
          [Clock].Today
          [SCRUM].SowingData.Cultivar
          // SCRUM Biomass
          [SCRUM].Total.Wt
          [SCRUM].Total.N
          [SCRUM].TotalDMAtHarvest
          [SCRUM].Product.Live.Wt
          [SCRUM].Product.Live.N
          [SCRUM].Product.Live.NConc
          [SCRUM].Product.DMAtHarvest
          [SCRUM].Product.ExpectedYield
          [SCRUM].Product.DryMatterContent
          [SCRUM].Product.Yield
          [SCRUM].Stover.Live.Wt
          [SCRUM].Stover.Live.N
          [SCRUM].Stover.Live.NConc
          [SCRUM].Stover.DMAtHarvest
          [SCRUM].Stover.Height
          [SCRUM].Stover.LAI
          [SCRUM].Stover.LAIDead
          [SCRUM].Stover.LAITotal
          [SCRUM].Stover.CoverDead
          [SCRUM].Stover.CoverGreen
          [SCRUM].Stover.CoverTotal
          [SCRUM].Root.Live.Wt
          [SCRUM].Root.Live.N
          [SCRUM].Root.Live.NConc
          [SCRUM].Root.DMatHarvest
          [SCRUM].Root.Depth
          // SCRUM Phenology
          [SCRUM].Phenology.AccumulatedEmergedTt
          [SCRUM].Phenology.AccumulatedTt
          [SCRUM].Phenology.CurrentPhaseName
          [SCRUM].Phenology.CurrentStageName
          [SCRUM].Phenology.Stage
          [SCRUM].Phenology.ThermalTime
          // SCRUM Allocation
          [SCRUM].Product.DMDemands.Structural.DMDemandFunction.PartitionFraction
          [SCRUM].Stover.DMDemands.Structural.DMDemandFunction.PartitionFraction
          [SCRUM].Root.DMDemands.Structural.DMDemandFunction.PartitionFraction
          [SCRUM].Arbitrator.DM.TotalPlantDemand
          [SCRUM].Arbitrator.DM.TotalFixationSupply
          [SCRUM].Arbitrator.N.TotalPlantDemand
          [SCRUM].Arbitrator.N.TotalPlantSupply
          [SCRUM].Arbitrator.N.TotalPlantSupply
          [SCRUM].Product.Allocated.Wt
          [SCRUM].Stover.Allocated.Wt
          [SCRUM].Root.Allocated.Wt
          // SCRUM limiting factors
          [SCRUM].Arbitrator.DM.NutrientLimitation
          [SCRUM].Arbitrator.DM.SinkLimitation
          [SCRUM].Arbitrator.FN
          [SCRUM].Stover.Fn
          [SCRUM].Stover.Fw
          // Water balance
          sum([Soil].SoilWater.SWmm) as SoilTotalWater
          [Soil].SoilWater.Drainage
          [Soil].SoilWater.Es
          [Soil].SoilWater.Runoff
          [Irrigation].IrrigationApplied
          [SCRUM].Stover.WaterDemand
          [SCRUM].Stover.Transpiration
          [SCRUM].Root.WaterUptake
          [AutomaticIrrigation].Script.AmountToApply
          [AutomaticIrrigation].Script.MonitoredLayerLL
          [AutomaticIrrigation].Script.MonitoredLayerDUL
          [AutomaticIrrigation].Script.MonitoredLayerSW
          [AutomaticIrrigation].Script.MonitoredLayerTarget
          [AutomaticIrrigation].Script.MonitoredLayerTrigger
          // Nitrogen balance
          sum([Soil].Nutrient.MineralN) as TotalSoilNitrogen
          [Fertiliser].NitrogenApplied
          [Soil].SoilWater.LeachNO3
          [Soil].Nutrient.DenitrifiedN
          [SCRUM].Root.NUptake
          [AutomaticFertiliser].Script.MonitoredLayerSoilN
          [AutomaticFertiliser].Script.AmountToApply
  Simulation RepeatPlantingSameCrop
    Memo Description
      This example is similar to the first but conducts repeat sowings of a cereal crop using SCRUM.   The necessary components in the "Field" are:
      * A PMF configured model called __"SCRUM"__
      * A SCRUMCropInstance, named __"SCRUMCereal"__.
      	* Parameters are set to represent a generic cereal crop.
      * A manager model called __"Sow Cereal Multiple dates"__ that establishes the SCRUMCereal crop each time the specified establishment dates occur.
    Weather: FileName=%root%/Examples/WeatherFiles/NZ_Lincoln.met
    Clock: Start=1999-06-14; End=2001-09-01
    Summary
    SoilArbitrator Soil Arbitrator
    Zone Field: Area=1; Slope=0; AspectAngle=0; Altitude=50
      Plant SCRUM
      ScrumCropInstance ScrumCereal: same as SingleCrop.Field.exampleScrumCropInstance
      Manager Sow Cereal Multiple dates
        EstablishDates = 15-sep-1999, 1-4-2000, 15/11/2000
        EstablishStage = Seed
        PlantingDepth = 15
        HarvestTimeOption = SettingThermalTime
        HarvestDate = 01/01/0001 00:00:00
        Tt_EstablishToHarvest = 1500
        HarvestStage = Maturity
        ExpectedYield = 8
        FieldLoss = 0
        ResidueRemoval = 0
        ResidueIncorporation = 1
        ResidueIncorporationDepth = 100
```csharp
using APSIM.Core;
using Models.Utilities;
using Models.PMF.SimplePlantModels;
using Models.PMF;
using Models.Soils;
using Models.Core;
using APSIM.Shared.Utilities;
using System.Linq;
using System;

namespace Models
{
    [Serializable]
    public class Script : Model, IStructureDependency
    {
        [Link] private Clock clock;
        [Link] private Zone zone;
        [Link(Type = LinkType.Scoped, ByName = true)]
        public Plant scrum;
        private ScrumManagementInstance management;
        
        public IStructure Structure { private get; set; }

        [Separator("Specify establishment and harvest conditions for this crop")]

        /// <summary>Date to establishment the crop</summary>
        [Description("Establishment dates, comma seperated (dd-mmm or dd/mm/yyyy):")]
        public string[] EstablishDates { get; set; }

        /// <summary>Stages at which the SCRUM is established</summary>
        [Description("Choose the establishment stage")]
        [Display(Type = DisplayType.ScrumEstablishStages)]
        public string EstablishStage {get; set;}

        /// <summary>Depth at which the crop/seeds are planted.</summary>
        [Description(" Planting depth (mm):")]
        public double PlantingDepth { get; set; }

        /// <summary>Choice on how the duration of crop is defined</summary>
        [Description("Choose how the crop cycle is defined:")]
        public HarvestTimingOption HarvestTimeOption {get; set;}

        private bool isHarvestDateDefined { get { return HarvestTimeOption == HarvestTimingOption.SettingDate; } }
        private bool isThermalTimeDefined { get { return HarvestTimeOption == HarvestTimingOption.SettingThermalTime; } }

        /// <summary>Date to establishment the crop</summary>
        [Description("  Harvest date (dd/mm/yyyy):")]
        [Display(VisibleCallback = "isHarvestDateDefined")]
        public DateTime HarvestDate { get; set; }

        /// <summary>Thermal time from establishment to harvest (if blank or zero must specify harvest date)</summary>
        [Description("  Thermal time from establishment to harvest (oCd):")]
        [Display(VisibleCallback = "isThermalTimeDefined")]
        public double Tt_EstablishToHarvest { get; set; }

        /// <summary>Stage at which the crop is to be harvested at</summary>
        [Description("Choose the stage to harvest the crop:")]
        [Display(Type = DisplayType.ScrumHarvestStages)]
        public string HarvestStage {get; set;}

        [Separator("Specify an appropriate potential yield for the crop (based on assumed genotype, sowing date, and local conditions)\n" +
                   "  *SCRUM will reduce yield if water or N stress are predicted")]

        /// <summary>Expected crop yield (t FW/ha)</summary>
        [Description("Potential crop yield, fresh weight (t/ha)")]
        public double ExpectedYield {get; set;}

        [Separator("Specify proportions of field loss and residue removal at harvest")]

        /// <summary>Proportion of product that is left in the field at harvest (due to disease, market, ect.)</summary>
        [Description("Proportion of product lost in the field at harvest (0-1):")]
        public double FieldLoss { get; set; }

        /// <summary>Proportion of stover that is removed from the field at harvest (e.g., bailing)</summary>
        [Description("Proportion of stover removed from the field at harvest (0-1):")]
        public double ResidueRemoval { get; set; }

        /// <summaryProportion of residues that is incorporated by cultivation after harvest</summary>
        [Description("Proportion of residue incorporated to soil at harvest (0-1):")]
        public double ResidueIncorporation { get; set; }

        /// <summary>Depth down to which the residues that are incorporated to by cultivation after harvest</summary>
        [Description("Depth to incorporate residues (mm):")]
        public double ResidueIncorporationDepth { get; set; }



        [EventSubscribe("DoManagement")]
        private void OnDoManagement(object sender, EventArgs e)
        {
            foreach (string date in EstablishDates)
                {
                    DateTime estabDate = DateUtilities.GetDate(date, clock.Today.Year);
                    if (DateTime.Compare(clock.Today, estabDate) == 0)
                    {
            
                        if (isHarvestDateDefined && (HarvestDate <= clock.Today))
                        {
                            throw new Exception("Harvest date is earlier than establishment date");
                        }

                        management = new ScrumManagementInstance(cropName: "ScrumCereal",
                                                                 establishDate: clock.Today,
                                                                 establishStage: EstablishStage,
                                                                 plantingDepth: PlantingDepth,
                                                                 harvestStage: HarvestStage,
                                                                 expectedYield: ExpectedYield,
                                                                 harvestDate: isHarvestDateDefined? HarvestDate : null,
                                                                 ttEstablishmentToHarvest: isThermalTimeDefined? Tt_EstablishToHarvest: double.NaN,
                                                                 fieldLoss: FieldLoss,
                                                                 residueRemoval: ResidueRemoval,
                                                                 residueIncorporation: ResidueIncorporation,
                                                                 residueIncorporationDepth: ResidueIncorporationDepth);
                        ScrumCropInstance currentCrop =   Structure.FindChild<ScrumCropInstance>("ScrumCereal", recurse: true, relativeTo: (INodeModel)zone);
                        currentCrop.Establish(management);
                    }
            }
        }

        /// <summary>Flag how harvest time is defined.</summary>
        public enum HarvestTimingOption
        {
            /// <summary>A date is to be used.</summary>
            SettingDate,
            /// <summary>A given thermal time sum is to be used.</summary>
            SettingThermalTime
        }
    }
}
```
      Soil: Latitude=0; Longitude=0
        Chemical: same as SingleCrop.Field.Soil.Chemical
        Water: Thickness=[100, 200, 300, 300, 300, 300]; InitialValues=[0.33, 0.33, 0.31, 0.15, 0.1, 0.06]; FilledFromTop=false
        Physical
          Thickness  ParticleSizeSand  ParticleSizeSilt  ParticleSizeClay  Rocks     BD   AirDry  LL15  DUL   SAT
          100        5                 65                30                0         1.2  0.08    0.13  0.33  0.5
          200        5                 65                30                0         1.2  0.13    0.13  0.33  0.5
          300        5                 65                30                0.135336  1.2  0.1     0.1   0.31  0.44
          300        5                 65                30                0         1.2  0.06    0.06  0.15  0.46
          300        5                 65                30                0.135336  1.2  0.04    0.04  0.1   0.44
          300        5                 65                30                0.135336  1.2  0.02    0.02  0.06  0.44
          Rocks, ParticleSizeSand, ParticleSizeSilt, ParticleSizeClay source: Calculated
          SoilCrop SCRUMSoil: LL=[0.13, 0.13, 0.1, 0.08, 0.11, 0.11]; KL=[0.1, 0.1, 0.1, 0.1, 0.1, 0.1]; XF=[1, 1, 1, 1, 1, 1]
          SoilCrop PotatoSoil: LL=[0.13, 0.13, 0.27, 0.27, 0.3, 0.3]; KL=[0.1, 0.06, 0.03, 0.01, 0, 0]; XF=[1, 1, 0.1, 0, 0, 0]
        WaterBalance SoilWater: same as SingleCrop.Field.Soil.SoilWater
        Nutrient
        Organic: same as SingleCrop.Field.Soil.Organic
        LayerStructure
          Thickness=[100, 100, 100, 100, 100, 100, 100, 100, 100, 100, 100, 100, 100, 100, 100]
        Solute NO3: same as SingleCrop.Field.Soil.NO3
        Solute NH4: same as SingleCrop.Field.Soil.NH4
        Solute Urea: same as SingleCrop.Field.Soil.Urea
        SoilTemperature Temperature
      SurfaceOrganicMatter: InitialResidueName=wheat; InitialResidueType=wheat; InitialResidueMass=2000; InitialStandingFraction=0; InitialCPR=0; InitialCNR=80
      MicroClimate: a_interception=0; b_interception=1; c_interception=0; d_interception=0; SoilHeatFluxFraction=0.4; MinimumHeightDiffForNewLayer=0; NightInterceptionFraction=0.5; ReferenceHeight=2
      Irrigation
      Fertiliser
      Manager AutomaticIrrigation: same as SingleCrop.Field.AutomaticIrrigation
      Manager AutomaticFertiliser
        FertiliserIsEnabled = True
        SeasonStartDate = 1-Aug
        SeasonEndDate = 30-Apr
        OnlyApplyOntoCrop = False
        SeasonsAllocation = 1000
        TriggerSoilN = 75
        AmountToApply = 25
        FertiliserType = UreaN
        ReturnDays = 3
        DepthToMonitor = 300
        LimitMonitoringDepth = False
        script: same as in SingleCrop.Field.AutomaticFertiliser
      Report: same as SingleCrop.Field.Report
  Simulation SCRUMRotationFromManager
    Memo Description
      This example shows a way to set up a rotation of different crops using SCRUM:
      * A PMF configured model called __"SCRUM"__
      * Two SCRUMCropInstances, named __"SCRUMLegume"__ and __"SCRUMCereal"__.
      	* Parameter values are set to represent a typical Cereal and Legume respectively.
      	* The name of each SCRUMCropInstance is arbitary and can whatever you want.
      	* Any number of SCRUMCropInstances can be included in each simulation and configured to represent different crops
      * Two manager models called __"Sow Cereal on Oct2000 harvest apr2001"__ and __"Sow legume Jun2001 harvest after 600 oCd"__.  These manager scripts are similar to those in the previous experiments but a CropName variable is declaired which provides the drop down box on the parameters tab to "Chose the crop to plant".  This provides a list of all the SCRUMCropInstances in the simulation so you can choose which is to be sown by the associated manager model.
    Weather: FileName=%root%/Examples/WeatherFiles/NZ_Lincoln.met
    Clock: Start=2000-07-01; End=2002-01-01
    Summary
    SoilArbitrator Soil Arbitrator
    Zone Field: Area=1; Slope=0; AspectAngle=0; Altitude=50
      Plant SCRUM
      ScrumCropInstance ScrumLegume: HarvestIndex=0.45; MoistureContent=0.14; RootProportion=0.1; MaxRootDepth=1005; SurfaceKL=0.1; MaxHeight=700; MaxCover=0.9; ExtinctionCoefficient=0.55; TypicalHarvestStage=Ripe; SeedlingNConc=0.05; ProductHarvestNConc=0.015; StoverHarvestNConc=0.01; RootNConc=0.01; LegumeFactor=1; BaseTemperature=0; OptimumTemperature=30; MaxTemperature=40; Tt_SowToEmergence=200; GSMax=0.008; R50=150; ConsiderWaterStress=true
      ScrumCropInstance ScrumCereal: same as SingleCrop.Field.exampleScrumCropInstance
      Manager Sow Cereal on Oct2000 harvest apr2001
        CropName = ScrumCereal
        EstablishDate = 14/10/2000
        EstablishStage = Seed
        PlantingDepth = 15
        HarvestTimeOption = SettingDate
        HarvestDate = 04/14/2001 00:00:00
        Tt_EstablishToHarvest = 1000
        HarvestStage = Maturity
        ExpectedYield = 8
        FieldLoss = 0
        ResidueRemoval = 0
        ResidueIncorporation = 1
        ResidueIncorporationDepth = 150
```csharp
using APSIM.Core;
using Models.Utilities;
using Models.PMF.SimplePlantModels;
using Models.PMF;
using Models.Soils;
using Models.Core;
using APSIM.Shared.Utilities;
using System.Linq;
using System;

namespace Models
{
    [Serializable]
    public class Script : Model, IStructureDependency
    {
        [Link] private Clock clock;
        [Link] private Zone zone;
        [Link(Type = LinkType.Scoped, ByName = true)]
        public Plant scrum;
        private ScrumManagementInstance management;
        
        public IStructure Structure { private get; set; }

        [Separator("Define the SCRUM crop to plant and its basic management")]

        /// <summary>SCRUM crop to stablish</summary>
        [Description("Chose the crop to plant:")]
        [Display(Type = DisplayType.SCRUMcropName)]
        public string CropName { get; set; }

        [Separator("Specify establishment and harvest conditions for this crop")]

        /// <summary>Date to establishment the crop</summary>
        [Description("Establishment date (dd-mmm or dd/mm/yyyy):")]
        public string EstablishDate { get; set; }

        /// <summary>Stages at which the SCRUM is established</summary>
        [Description("Choose the establishment stage")]
        [Display(Type = DisplayType.ScrumEstablishStages)]
        public string EstablishStage {get; set;}

        /// <summary>Depth at which the crop/seeds are planted.</summary>
        [Description(" Planting depth (mm):")]
        public double PlantingDepth { get; set; }

        /// <summary>Choice on how the duration of crop is defined</summary>
        [Description("Choose how the crop cycle is defined:")]
        public HarvestTimingOption HarvestTimeOption {get; set;}

        private bool isHarvestDateDefined { get { return HarvestTimeOption == HarvestTimingOption.SettingDate; } }
        private bool isThermalTimeDefined { get { return HarvestTimeOption == HarvestTimingOption.SettingThermalTime; } }

        /// <summary>Date to establishment the crop</summary>
        [Description("  Harvest date (dd/mm/yyyy):")]
        [Display(VisibleCallback = "isHarvestDateDefined")]
        public DateTime HarvestDate { get; set; }

        /// <summary>Thermal time from establishment to harvest (if blank or zero must specify harvest date)</summary>
        [Description("  Thermal time from establishment to harvest (oCd):")]
        [Display(VisibleCallback = "isThermalTimeDefined")]
        public double Tt_EstablishToHarvest { get; set; }

        /// <summary>Stage at which the crop is to be harvested at</summary>
        [Description("Choose the stage to harvest the crop:")]
        [Display(Type = DisplayType.ScrumHarvestStages)]
        public string HarvestStage {get; set;}

        [Separator("Specify an appropriate potential yield for the crop (based on assumed genotype, sowing date, and local conditions)\n" +
                   "  *SCRUM will reduce yield if water or N stress are predicted")]

        /// <summary>Expected crop yield (t FW/ha)</summary>
        [Description("Potential crop yield, fresh weight (t/ha)")]
        public double ExpectedYield {get; set;}

        [Separator("Specify proportions of field loss and residue removal at harvest")]

        /// <summary>Proportion of product that is left in the field at harvest (due to disease, market, ect.)</summary>
        [Description("Proportion of product lost in the field at harvest (0-1):")]
        public double FieldLoss { get; set; }

        /// <summary>Proportion of stover that is removed from the field at harvest (e.g., bailing)</summary>
        [Description("Proportion of stover removed from the field at harvest (0-1):")]
        public double ResidueRemoval { get; set; }

        /// <summaryProportion of residues that is incorporated by cultivation after harvest</summary>
        [Description("Proportion of residue incorporated to soil at harvest (0-1):")]
        public double ResidueIncorporation { get; set; }

        /// <summary>Depth down to which the residues that are incorporated to by cultivation after harvest</summary>
        [Description("Depth to incorporate residues (mm):")]
        public double ResidueIncorporationDepth { get; set; }



        [EventSubscribe("DoManagement")]
        private void OnDoManagement(object sender, EventArgs e)
        {
            if (DateUtilities.DatesAreEqual(EstablishDate, clock.Today))
            {
                if (isHarvestDateDefined && (HarvestDate <= clock.Today))
                {
                    throw new Exception("Harvest date is earlier than establishment date");
                }

                management = new ScrumManagementInstance(cropName: CropName,
                                                         establishDate: clock.Today,
                                                         establishStage: EstablishStage,
                                                         plantingDepth: PlantingDepth,
                                                         harvestStage: HarvestStage,
                                                         expectedYield: ExpectedYield,
                                                         harvestDate: isHarvestDateDefined? HarvestDate : null,
                                                         ttEstablishmentToHarvest: isThermalTimeDefined? Tt_EstablishToHarvest: double.NaN,
                                                         fieldLoss: FieldLoss,
                                                         residueRemoval: ResidueRemoval,
                                                         residueIncorporation: ResidueIncorporation,
                                                         residueIncorporationDepth: ResidueIncorporationDepth);
                ScrumCropInstance currentCrop =   Structure.FindChild<ScrumCropInstance>(CropName, recurse: true, relativeTo: (INodeModel)zone);
                currentCrop.Establish(management);
            }
        }

        /// <summary>Flag how harvest time is defined.</summary>
        public enum HarvestTimingOption
        {
            /// <summary>A date is to be used.</summary>
            SettingDate,
            /// <summary>A given thermal time sum is to be used.</summary>
            SettingThermalTime
        }
    }
}
```
      Manager Sow legume Jun2001 harvest after 600 oCd
        CropName = ScrumLegume
        EstablishDate = 01/06/2001
        EstablishStage = Seed
        PlantingDepth = 15
        HarvestTimeOption = SettingThermalTime
        HarvestDate = 01/01/0001 00:00:00
        Tt_EstablishToHarvest = 600
        HarvestStage = LateReproductive
        ExpectedYield = 3
        FieldLoss = 0.1
        ResidueRemoval = 0.6
        ResidueIncorporation = 0.5
        ResidueIncorporationDepth = 50
        script: same as in SCRUMRotationFromManager.Field.Sow Cereal on Oct2000 harvest apr2001
      Soil: Latitude=0; Longitude=0
        Chemical: same as SingleCrop.Field.Soil.Chemical
        Water: Thickness=[100, 200, 300, 300, 300, 300]; InitialValues=[0.33, 0.33, 0.31, 0.15, 0.1, 0.06]; FilledFromTop=false
        Physical: same as RepeatPlantingSameCrop.Field.Soil.Physical
        WaterBalance SoilWater: same as SingleCrop.Field.Soil.SoilWater
        Nutrient
        Organic: same as SingleCrop.Field.Soil.Organic
        LayerStructure
          Thickness=[100, 100, 100, 100, 100, 100, 100, 100, 100, 100, 100, 100, 100, 100, 100]
        Solute NO3: Thickness=[100, 200, 300, 300, 300, 300]; InitialValues=[225, 12.5, 1.389, 1.389, 0, 0]; InitialValuesUnits=ppm; WaterTableConcentration=0; D0=0; DepthConstant=0; MaxDepthSoluteAccessible=0; RunoffEffectivenessAtMovingSolute=0; MaxEffectiveRunoff=0
        Solute NH4: same as SingleCrop.Field.Soil.NH4
        Solute Urea: same as SingleCrop.Field.Soil.Urea
        SoilTemperature Temperature
      SurfaceOrganicMatter: InitialResidueName=wheat; InitialResidueType=wheat; InitialResidueMass=2000; InitialStandingFraction=0; InitialCPR=0; InitialCNR=80
      MicroClimate: a_interception=0; b_interception=1; c_interception=0; d_interception=0; SoilHeatFluxFraction=0.4; MinimumHeightDiffForNewLayer=0; NightInterceptionFraction=0.5; ReferenceHeight=2
      Irrigation
      Fertiliser
      Manager AutomaticIrrigation: same as SingleCrop.Field.AutomaticIrrigation
      Manager AutomaticFertiliser: same as SingleCrop.Field.AutomaticFertiliser
      Report: same as SingleCrop.Field.Report
  Experiment Rotation
    Memo Description
      This example demonstrates how SCRUM models can be used in combination with other APSIM models to create crop rotations.  In this example we are using a conditional planting rule that will sow the wheat model within a specified date window if soil moisture and rainfall conditions are satisifactory.  It has an additional planting rule that will sow a SCRUM crop instance within a specified date window if soil moisture and rainfall conditions are satisfactory.
      In this example we have set up an experiment that creates rotations of either continious wheat with fertiliser applied at planting or wheat in rotation with the SCRUM legume and no fertiliser applied.  The SCRUM legume is parameterised with a harvest index of 0.99 and 100% of product left in the field at harvest to simulate a green manure where all N from the leguem remains in the field.
    Factors
      Factor System
        CompositeFactor Legume
          Specifications:
            [Sow SCRUM legume].Script.IncludeSCRUM = true
            [Fertilise at sowing].Script.Amount = 0
        CompositeFactor Fertiliser
          Specifications:
            [Sow SCRUM legume].Script.IncludeSCRUM = false
            [Fertilise at sowing].Script.Amount = 150
    Simulation WheatSCRUMComplete
      Clock: Start=1970-01-01; End=2000-12-31
      Summary
      Weather: FileName=%root%/Examples/WeatherFiles/AU_Dalby.met
      SoilArbitrator
      MicroClimate: a_interception=0; b_interception=1; c_interception=0; d_interception=0; SoilHeatFluxFraction=0.4; MinimumHeightDiffForNewLayer=0; NightInterceptionFraction=0.5; ReferenceHeight=2
      Zone Field: Area=1; Slope=0; AspectAngle=0; Altitude=50
        Report: EventNames=[Clock].EndOfDay
          VariableNames:
            [Clock].Today
            [Wheat].LAI
            [Wheat].Phenology.Zadok.Stage
            [Wheat].Phenology.CurrentStageName
            [Wheat].AboveGround.Wt
            [Wheat].AboveGround.N
            [Wheat].Grain.Total.Wt*10 as Yield
            [Wheat].Grain.Protein
            [Wheat].Grain.Size
            [Wheat].Grain.Number
            [Wheat].Grain.Total.Wt
            [Wheat].Grain.Total.N
            [Wheat].Total.Wt
            [Wheat].Total.N * 10 as WheatN
            sum([ISoilWater].ESW)
            sum([Soil].Nutrient.MineralN)
            [Wheat].LAI
            [SCRUM].Phenology.Stage
            [SCRUM].Phenology.CurrentStageName
            [SCRUM].AboveGround.Wt
            [SCRUM].AboveGround.N
            [SCRUM].Product.Total.Wt*10 as Yield
            [SCRUM].Product.Total.N
            [SCRUM].Total.Wt
            [SCRUM].Total.N * 10 as LegumeN
            [SurfaceOrganicMatter].N
        Fertiliser
        Soil: ASCOrder=Vertosol; ASCSubOrder=Black; SoilType=Clay; Site=Norwin; NearestTown=Norwin; Region=Darling Downs and Granite Belt; State=Queensland; Country=Australia; NaturalVegetation=Qld. Bluegrass, possible Qld. Blue gum; ApsoilNumber=900; Latitude=-27.581836; Longitude=151.320206; LocationAccuracy=+/- 20m; YearOfSampling=0
          DataSource=CSIRO Sustainable Ecosystems, Toowoomba; Characteriesd as part of the GRDC funded project"Doing it better, doing it smarter, managing soil water in Australian agriculture' 2011
          Comments=Clay - OC, CLL for all crops estimated-based on Bongeen Mywybilla Soil No1
          Physical
            Thickness  ParticleSizeSand  ParticleSizeSilt  ParticleSizeClay  Rocks  BD       AirDry    LL15      DUL       SAT       KS
            150        5                 65                30                0      1.01056  0.13025   0.2605    0.521     0.588655  20
            150        5                 65                30                0      1.07146  0.198689  0.248362  0.496723  0.565677  20
            300        5                 65                30                0      1.09394  0.28      0.28      0.488438  0.557193  20
            300        5                 65                30                0      1.15861  0.28      0.28      0.480297  0.532787  20
            300        5                 65                30                0      1.17301  0.28      0.28      0.471584  0.527354  20
            300        5                 65                30                0      1.16287  0.28      0.28      0.457071  0.53118   20
            300        5                 65                30                0      1.1875   0.28      0.28      0.452332  0.521888  20
            Rocks, ParticleSizeSand, ParticleSizeSilt, ParticleSizeClay source: Calculated
            SoilCrop WheatSoil: LL=[0.261, 0.248, 0.28, 0.306, 0.36, 0.392, 0.446]; KL=[0.06, 0.06, 0.06, 0.04, 0.04, 0.02, 0.01]; XF=[1, 1, 1, 1, 1, 1, 1]
            SoilCrop SCRUMSoil: LL=[0.261, 0.248, 0.28, 0.28, 0.28, 0.28, 0.28]; KL=[1, 1, 1, 1, 1, 1, 1]; XF=[1, 1, 1, 1, 1, 1, 1]
          WaterBalance SoilWater: SummerDate=1-Nov; SummerU=5; SummerCona=5; WinterDate=1-Apr; WinterU=5; WinterCona=5; DiffusConst=40; DiffusSlope=16; Salb=0.12; CN2Bare=73; CNRed=20; CNCov=0.8; PSIDul=-100; Thickness=[150, 150, 300, 300, 300, 300, 300]; SWCON=[0.3, 0.3, 0.3, 0.3, 0.3, 0.3, 0.3]
          Organic: FOMCNRatio=40; CarbonUnits=Total
            Thickness  Carbon  SoilCNRatio  FBiom  FInert  FOM
            150        1.2     12           0.04   0.4     347.129
            150        0.96    12           0.02   0.6     270.344
            300        0.6     12           0.02   0.8     163.972
            300        0.3     12           0.02   1       99.4541
            300        0.18    12           0.01   1       60.322
            300        0.12    12           0.01   1       36.5871
            300        0.12    12           0.01   1       22.1912
          Chemical: PHUnits=Water
            Thickness  PH  CEC
            150        8   11.045
            150        8   10.505
            300        8   9.695
            300        8   9.02
            300        8   8.75
            300        8   8.615
            300        8   8.615
            CEC source: Calculated
          Water: Thickness=[150, 150, 300, 300, 300, 300, 300]; FilledFromTop=false
            InitialValues=[0.521, 0.496723, 0.488438, 0.480297, 0.471584, 0.457071, 0.452332]
          Nutrient
          Solute NO3: Thickness=[150, 150, 300, 300, 300, 300, 300]; InitialValues=[1, 1, 1, 1, 1, 1, 1]; InitialValuesUnits=ppm; WaterTableConcentration=0; D0=0; DepthConstant=0; MaxDepthSoluteAccessible=0; RunoffEffectivenessAtMovingSolute=0; MaxEffectiveRunoff=0
          Solute NH4: Thickness=[150, 150, 300, 300, 300, 300, 300]; InitialValues=[0.1, 0.1, 0.1, 0.1, 0.1, 0.1, 0.1]; InitialValuesUnits=ppm; WaterTableConcentration=0; D0=0; DepthConstant=0; MaxDepthSoluteAccessible=0; RunoffEffectivenessAtMovingSolute=0; MaxEffectiveRunoff=0
          Solute Urea: Thickness=[150, 150, 300, 300, 300, 300, 300]; InitialValues=[0, 0, 0, 0, 0, 0, 0]; InitialValuesUnits=kg/ha; WaterTableConcentration=0; D0=0; DepthConstant=0; MaxDepthSoluteAccessible=0; RunoffEffectivenessAtMovingSolute=0; MaxEffectiveRunoff=0
          SoilTemperature Temperature
        SurfaceOrganicMatter: InitialResidueName=wheat_stubble; InitialResidueType=wheat; InitialResidueMass=500; InitialStandingFraction=0; InitialCPR=0; InitialCNR=100
        Plant Wheat
        Manager Sow wheat
          Crop = [Wheat]
          StartDate = 15-may
          EndDate = 20-jun
          MinESW = 200
          MinRain = 35
          RainDays = 7
          CultivarName = Hartog
          SowingDepth = 30
          RowSpacing = 250
          Population = 120
```csharp
using APSIM.Numerics;
using Models.Climate;
using System.Linq;
using System;
using Models.Core;
using Models.PMF;
using Models.Soils;
using Models.Utilities;
using APSIM.Shared.Utilities;
using Models.Interfaces;
using System.Diagnostics;

namespace Models
{
    [Serializable]
    public class Script : Model
    {
        [Link] private Clock Clock;
        [Link] private Fertiliser Fertiliser;
        [Link] private Summary Summary;
        [Link] private Soil Soil;
        private Accumulator accumulatedRain;
        [Link]
        private ISoilWater waterBalance;
        
        [Description("Crop")]
        public IPlant Crop { get; set; }

        [Description("Start of sowing window (d-mmm)")]
        public string StartDate { get; set; }

        [Description("End of sowing window (d-mmm)")]
        public string EndDate { get; set; }

        [Description("Minimum extractable soil water for sowing (mm)")]
        public double MinESW { get; set; }

        [Description("Accumulated rainfall required for sowing (mm)")]
        public double MinRain { get; set; }

        [Description("Duration of rainfall accumulation (d)")]
        public int RainDays { get; set; }

        [Display(Type = DisplayType.CultivarName)]
        [Description("Cultivar to be sown")]
        public string CultivarName { get; set; }

        [Description("Sowing depth (mm)")]
        public double SowingDepth { get; set; }

        [Description("Row spacing (mm)")]
        public double RowSpacing { get; set; }

        [Description("Plant population (/m2)")]
        public double Population { get; set; }
        
        
        [EventSubscribe("StartOfSimulation")]
        private void OnSimulationCommencing(object sender, EventArgs e)
        {
            accumulatedRain = new Accumulator(this, "[Weather].Rain", RainDays);
        }

        [EventSubscribe("DoManagement")]
        private void OnDoManagement(object sender, EventArgs e)
        {
            accumulatedRain.Update();
            
            if (DateUtilities.WithinDates(StartDate, Clock.Today, EndDate) &&
                !Crop.IsAlive &&
                MathUtilities.Sum(waterBalance.ESW) > MinESW &&
                accumulatedRain.Sum > MinRain)
            {
                Crop.Sow(population: Population, cultivar: CultivarName, depth: SowingDepth, rowSpacing: RowSpacing);    
            }
        }
    }
}
```
        Manager Fertilise at sowing
          Crop = [Wheat]
          FertiliserType = NO3N
          Amount = 50
```csharp
using Models.Soils;
using System;
using System.Linq;
using Models.Core;
using Models.PMF;
namespace Models
{
    [Serializable]
    public class Script : Model
    {
        [Link] Clock Clock;
        [Link] Fertiliser Fertiliser;
        
        [Description("Crop to be fertilised")]
        public IPlant Crop { get; set; }

        [Description("Type of fertiliser to apply? ")] 
        [Display(Type = DisplayType.FertiliserType)]public string FertiliserType { get; set; }
    
        [Description("Amount of fertiliser to be applied (kg/ha)")]
        public double Amount { get; set; }
        
        [EventSubscribe("Sowing")]
        private void OnSowing(object sender, EventArgs e)
        {
            Model crop = sender as Model;
            if (Crop != null && crop.Name.ToLower() == (Crop as IModel).Name.ToLower())
                Fertiliser.Apply(amount: Amount, type: FertiliserType);
        }
    }
}
```
        Manager Harvest
          Crop = [Wheat]
```csharp
using APSIM.Shared.Utilities;
using Models.Utilities;
using Models.Soils;
using Models.PMF;
using Models.Core;
using System;
using System.Linq;

namespace Models
{
    [Serializable] 
    public class Script : Model
    {
        [Description("Crop")]
        public IPlant Crop { get; set; }
        
        [EventSubscribe("DoManagement")]
        private void OnDoManagement(object sender, EventArgs e)
        {
            if (Crop.IsReadyForHarvesting)
            {
                Crop.Harvest();
                Crop.EndCrop();
            }
        }
    }
}
```
        Plant SCRUM
        ScrumCropInstance ScrumLegume: HarvestIndex=0.99; MoistureContent=0; RootProportion=0.1; MaxRootDepth=1005; SurfaceKL=0.1; MaxHeight=700; MaxCover=0.9; ExtinctionCoefficient=0.55; TypicalHarvestStage=EarlyReproductive; SeedlingNConc=0.05; ProductHarvestNConc=0.025; StoverHarvestNConc=0.01; RootNConc=0.01; LegumeFactor=1; BaseTemperature=0; OptimumTemperature=30; MaxTemperature=40; Tt_SowToEmergence=200; GSMax=0.008; R50=150; ConsiderWaterStress=true
        Manager Sow SCRUM legume
          CropName = ScrumLegume
          IncludeSCRUM = False
          StartDate = 20-jun
          EndDate = 1-Aug
          MinESW = 100
          MinRain = 10
          RainDays = 7
          EstablishStage = Seed
          PlantingDepth = 15
          HarvestTimeOption = SettingThermalTime
          HarvestDate = 10-Jan
          Tt_EstablishToHarvest = 1000
          HarvestStage = EarlyReproductive
          ExpectedYield = 6
          FieldLoss = 1
          ResidueRemoval = 0
          ResidueIncorporation = 0
          ResidueIncorporationDepth = 0
```csharp
using APSIM.Core;
using Models.Utilities;
using Models.PMF.SimplePlantModels;
using Models.PMF;
using Models.Soils;
using Models.Core;
using APSIM.Shared.Utilities;
using System.Linq;
using System;
using Models.Interfaces;
using APSIM.Numerics;
using System.Diagnostics;

namespace Models
{
    [Serializable]
    public class Script : Model, IStructureDependency
    {
        [Link] private Clock clock;
        [Link] private Zone zone;
        [Link(Type = LinkType.Scoped, ByName = true)]
        public Plant scrum;
        [Link(Type = LinkType.Scoped, ByName = true)]
        public Plant wheat;
        private ScrumManagementInstance management;
        [Link] private Soil Soil;
        private Accumulator accumulatedRain;
        [Link]
        private ISoilWater waterBalance;
        
        
        public IStructure Structure { private get; set; }

        [Separator("Define the SCRUM crop to plant and its basic management")]

        /// <summary>SCRUM crop to stablish</summary>
        [Description("Chose the crop to plant:")]
        [Display(Type = DisplayType.SCRUMcropName)]
        public string CropName { get; set; }

        [Description("Check box to include SCRUM crop in rotation")]
        public bool IncludeSCRUM {get; set;}
        
        [Separator("Specify establishment and harvest conditions for this crop")]

        [Description("Start of sowing window (d-mmm)")]
        public string StartDate { get; set; }

        [Description("End of sowing window (d-mmm)")]
        public string EndDate { get; set; }

        [Description("Minimum extractable soil water for sowing (mm)")]
        public double MinESW { get; set; }

        [Description("Accumulated rainfall required for sowing (mm)")]
        public double MinRain { get; set; }

        [Description("Duration of rainfall accumulation (d)")]
        public int RainDays { get; set; }

        /// <summary>Stages at which the SCRUM is established</summary>
        [Description("Choose the establishment stage")]
        [Display(Type = DisplayType.ScrumEstablishStages)]
        public string EstablishStage {get; set;}

        /// <summary>Depth at which the crop/seeds are planted.</summary>
        [Description(" Planting depth (mm):")]
        public double PlantingDepth { get; set; }

        /// <summary>Choice on how the duration of crop is defined</summary>
        [Description("Choose how the crop cycle is defined:")]
        public HarvestTimingOption HarvestTimeOption {get; set;}

        private bool isHarvestDateDefined { get { return HarvestTimeOption == HarvestTimingOption.SettingDate; } }
        private bool isThermalTimeDefined { get { return HarvestTimeOption == HarvestTimingOption.SettingThermalTime; } }

        /// <summary>Date to establishment the crop</summary>
        [Description("  Harvest date (dd/mm/yyyy):")]
        [Display(VisibleCallback = "isHarvestDateDefined")]
        public string HarvestDate { get; set; }

        /// <summary>Thermal time from establishment to harvest (if blank or zero must specify harvest date)</summary>
        [Description("  Thermal time from establishment to harvest (oCd):")]
        [Display(VisibleCallback = "isThermalTimeDefined")]
        public double Tt_EstablishToHarvest { get; set; }

        /// <summary>Stage at which the crop is to be harvested at</summary>
        [Description("Choose the stage to harvest the crop:")]
        [Display(Type = DisplayType.ScrumHarvestStages)]
        public string HarvestStage {get; set;}

        [Separator("Specify an appropriate potential yield for the crop (based on assumed genotype, sowing date, and local conditions)\n" +
                   "  *SCRUM will reduce yield if water or N stress are predicted")]

        /// <summary>Expected crop yield (t FW/ha)</summary>
        [Description("Potential crop yield, fresh weight (t/ha)")]
        public double ExpectedYield {get; set;}

        [Separator("Specify proportions of field loss and residue removal at harvest")]

        /// <summary>Proportion of product that is left in the field at harvest (due to disease, market, ect.)</summary>
        [Description("Proportion of product lost in the field at harvest (0-1):")]
        public double FieldLoss { get; set; }

        /// <summary>Proportion of stover that is removed from the field at harvest (e.g., bailing)</summary>
        [Description("Proportion of stover removed from the field at harvest (0-1):")]
        public double ResidueRemoval { get; set; }

        /// <summaryProportion of residues that is incorporated by cultivation after harvest</summary>
        [Description("Proportion of residue incorporated to soil at harvest (0-1):")]
        public double ResidueIncorporation { get; set; }

        /// <summary>Depth down to which the residues that are incorporated to by cultivation after harvest</summary>
        [Description("Depth to incorporate residues (mm):")]
        public double ResidueIncorporationDepth { get; set; }

        [EventSubscribe("StartOfSimulation")]
        private void OnSimulationCommencing(object sender, EventArgs e)
        {
            accumulatedRain = new Accumulator(this, "[Weather].Rain", RainDays);
        }

        [EventSubscribe("DoManagement")]
        private void OnDoManagement(object sender, EventArgs e)
        {
            accumulatedRain.Update();
            
            if (IncludeSCRUM &&
                DateUtilities.WithinDates(StartDate, clock.Today, EndDate) &&
                !wheat.IsAlive &&
                !scrum.IsAlive &&
                MathUtilities.Sum(waterBalance.ESW) > MinESW &&
                accumulatedRain.Sum > MinRain)
            {
                DateTime harvDate = DateUtilities.GetDate(HarvestDate,clock.Today.Year+1);
                
                if (isHarvestDateDefined && (harvDate <= clock.Today))
                {
                    throw new Exception("Harvest date is earlier than establishment date");
                }
                
                management = new ScrumManagementInstance(cropName: CropName,
                                                         establishDate: clock.Today,
                                                         establishStage: EstablishStage,
                                                         plantingDepth: PlantingDepth,
                                                         harvestStage: HarvestStage,
                                                         expectedYield: ExpectedYield,
                                                         harvestDate: isHarvestDateDefined? harvDate : null,
                                                         ttEstablishmentToHarvest: isThermalTimeDefined? Tt_EstablishToHarvest: double.NaN,
                                                         fieldLoss: FieldLoss,
                                                         residueRemoval: ResidueRemoval,
                                                         residueIncorporation: ResidueIncorporation,
                                                         residueIncorporationDepth: ResidueIncorporationDepth);
                ScrumCropInstance currentCrop =   Structure.FindChild<ScrumCropInstance>(CropName, recurse: true, relativeTo: (INodeModel)zone);
                currentCrop.Establish(management);
                
                //Crop.Sow(population: Population, cultivar: CultivarName, depth: SowingDepth, rowSpacing: RowSpacing);    
            }
           
           /* if (DateUtilities.DatesAreEqual(EstablishDate, clock.Today))
            {

            } */
        }

        /// <summary>Flag how harvest time is defined.</summary>
        public enum HarvestTimingOption
        {
            /// <summary>A date is to be used.</summary>
            SettingDate,
            /// <summary>A given thermal time sum is to be used.</summary>
            SettingThermalTime
        }
    }
}
```
  Folder Detailed Examples
    Experiment EstablishAndHarvestAtDifferentStages
      Memo
        This example shows how SCRUM crop instances can be established and harvested at different stages to give different development patterns
      Factors
        Permutation
          Factor EstabAt
            Specification=[CropManagement].Script.EstablishStage = Seed, Emergence, Seedling
          Factor HarvAt
            Specification=[CropManagement].Script.HarvestStage = Vegetative, EarlyReproductive, MidReproductive, LateReproductive, Maturity, Ripe
      Simulation EstabAndHarv
        Weather: FileName=%root%/Examples/WeatherFiles/NZ_Lincoln.met
        Clock: Start=1998-10-14; End=1999-07-01
        Summary
        SoilArbitrator Soil Arbitrator
        Zone Field: Area=1; Slope=0; AspectAngle=0; Altitude=50
          Soil: Latitude=0; Longitude=0
            Chemical: same as SingleCrop.Field.Soil.Chemical
            Water: Thickness=[100, 200, 300, 300, 300, 300]; InitialValues=[0.33, 0.33, 0.31, 0.15, 0.1, 0.06]; FilledFromTop=false
            Physical
              Thickness  ParticleSizeSand  ParticleSizeSilt  ParticleSizeClay  Rocks     BD   AirDry  LL15  DUL   SAT
              100        5                 65                30                0         1.2  0.08    0.13  0.33  0.5
              200        5                 65                30                0         1.2  0.13    0.13  0.33  0.5
              300        5                 65                30                0.135336  1.2  0.1     0.1   0.31  0.44
              300        5                 65                30                0         1.2  0.06    0.06  0.31  0.46
              300        5                 65                30                0.135336  1.2  0.04    0.04  0.31  0.44
              300        5                 65                30                0.135336  1.2  0.02    0.02  0.31  0.44
              Rocks, ParticleSizeSand, ParticleSizeSilt, ParticleSizeClay source: Calculated
              SoilCrop SCRUMSoil: LL=[0.13, 0.13, 0.1, 0.08, 0.11, 0.11]; KL=[0.1, 0.1, 0.1, 0.1, 0.1, 0.1]; XF=[1, 1, 1, 1, 1, 1]
              SoilCrop PotatoSoil: LL=[0.13, 0.13, 0.27, 0.27, 0.3, 0.3]; KL=[0.1, 0.06, 0.03, 0.01, 0, 0]; XF=[1, 1, 0.1, 0, 0, 0]
            WaterBalance SoilWater: same as SingleCrop.Field.Soil.SoilWater
            Nutrient
            Organic: same as SingleCrop.Field.Soil.Organic
            LayerStructure
              Thickness=[100, 100, 100, 100, 100, 100, 100, 100, 100, 100, 100, 100, 100, 100, 100]
            Solute NO3: Thickness=[100, 200, 300, 300, 300, 300]; InitialValues=[1225, 12.5, 1.389, 1.389, 0, 0]; InitialValuesUnits=ppm; WaterTableConcentration=0; D0=0; DepthConstant=0; MaxDepthSoluteAccessible=0; RunoffEffectivenessAtMovingSolute=0; MaxEffectiveRunoff=0
            Solute NH4: same as SingleCrop.Field.Soil.NH4
            Solute Urea: same as SingleCrop.Field.Soil.Urea
            SoilTemperature Temperature
          SurfaceOrganicMatter: InitialResidueName=wheat; InitialResidueType=wheat; InitialResidueMass=2000; InitialStandingFraction=0; InitialCPR=0; InitialCNR=80
          MicroClimate: a_interception=0; b_interception=1; c_interception=0; d_interception=0; SoilHeatFluxFraction=0.4; MinimumHeightDiffForNewLayer=0; NightInterceptionFraction=0.5; ReferenceHeight=2
          Plant SCRUM
          Irrigation
          Fertiliser
          Manager CropManagement
            CropName = SCRUM_Wheat
            EstablishDate = 14/10/1998
            EstablishStage = Seedling
            PlantingDepth = 20
            HarvestTimeOption = SettingThermalTime
            HarvestDate = 01/04/1999
            Tt_EstablishToHarvest = 1000
            HarvestStage = Maturity
            ExpectedYield = 10
            FieldLoss = 0
            ResidueRemoval = 0
            ResidueIncorporation = 0
            ResidueIncorporationDepth = 0
```csharp
using APSIM.Core;
using Models.Utilities;
using Models.PMF.SimplePlantModels;
using Models.PMF;
using Models.Soils;
using Models.Core;
using APSIM.Shared.Utilities;
using System.Linq;
using System;

namespace Models
{
    [Serializable]
    public class Script : Model, IStructureDependency
    {
        [Link] private Clock clock;
        [Link] private Zone zone;
        [Link(Type = LinkType.Scoped, ByName = true)]
        public Plant scrum;
        private ScrumManagementInstance management;
        private DateTime dateToHarvest;
        
        public IStructure Structure { private get; set; }

        [Separator("Define the SCRUM crop to plant and its basic management")]

        /// <summary>SCRUM crop to stablish</summary>
        [Description("Chose the crop to plant:")]
        [Display(Type = DisplayType.SCRUMcropName)]
        public string CropName { get; set; }

        [Separator("Specify establishment and harvest conditions for this crop")]

        /// <summary>Date to establishment the crop</summary>
        [Description("Establishment date (dd-mmm or dd/mm/yyyy):")]
        public string EstablishDate { get; set; }

        /// <summary>Stages at which the SCRUM is established</summary>
        [Description("Choose the establishment stage")]
        [Display(Type = DisplayType.ScrumEstablishStages)]
        public string EstablishStage {get; set;}

        /// <summary>Depth at which the crop/seeds are planted.</summary>
        [Description(" Planting depth (mm):")]
        public double PlantingDepth { get; set; }

        /// <summary>Choice on how the duration of crop is defined</summary>
        [Description("Choose how the crop cycle is defined:")]
        public HarvestTimingOption HarvestTimeOption {get; set;}

        private bool isHarvestDateDefined { get { return HarvestTimeOption == HarvestTimingOption.SettingDate; } }
        private bool isThermalTimeDefined { get { return HarvestTimeOption == HarvestTimingOption.SettingThermalTime; } }

        /// <summary>Date to establishment the crop</summary>
        [Description("  Harvest date (dd-mmm or dd/mm/yyyy):")]
        [Display(VisibleCallback = "isHarvestDateDefined")]
        public string HarvestDate { get; set; }

        /// <summary>Thermal time from establishment to harvest (if blank or zero must specify harvest date)</summary>
        [Description("  Thermal time from establishment to harvest (oCd):")]
        [Display(VisibleCallback = "isThermalTimeDefined")]
        public double Tt_EstablishToHarvest { get; set; }

        /// <summary>Stage at which the crop is to be harvested at</summary>
        [Description("Choose the stage to harvest the crop:")]
        [Display(Type = DisplayType.ScrumHarvestStages)]
        public string HarvestStage {get; set;}

        [Separator("Specify an appropriate potential yield for the crop (based on assumed genotype, sowing date, and local conditions)\n" +
                   "  *SCRUM will reduce yield if water or N stress are predicted")]

        /// <summary>Expected crop yield (t FW/ha)</summary>
        [Description("Potential crop yield, fresh weight (t/ha)")]
        public double ExpectedYield {get; set;}

        [Separator("Specify proportions of field loss and residue removal at harvest")]

        /// <summary>Proportion of product that is left in the field at harvest (due to disease, market, ect.)</summary>
        [Description("Proportion of product lost in the field at harvest (0-1):")]
        public double FieldLoss { get; set; }

        /// <summary>Proportion of stover that is removed from the field at harvest (e.g., bailing)</summary>
        [Description("Proportion of stover removed from the field at harvest (0-1):")]
        public double ResidueRemoval { get; set; }

        /// <summaryProportion of residues that is incorporated by cultivation after harvest</summary>
        [Description("Proportion of residue incorporated to soil at harvest (0-1):")]
        public double ResidueIncorporation { get; set; }

        /// <summary>Depth down to which the residues that are incorporated to by cultivation after harvest</summary>
        [Description("Depth to incorporate residues (mm):")]
        public double ResidueIncorporationDepth { get; set; }



        [EventSubscribe("DoManagement")]
        private void OnDoManagement(object sender, EventArgs e)
        {
            if (DateUtilities.DatesAreEqual(EstablishDate, clock.Today))
            {
                // check harvest date
                if (isHarvestDateDefined)
                {
                    dateToHarvest = DateUtilities.GetDate(HarvestDate, clock.Today.Year);
                    if (dateToHarvest <= clock.Today)
                    {
                        if (DateUtilities.ValidateStringHasYear(HarvestDate))
                        { // year was given, but not a good one
                            throw new Exception("Harvest date is earlier than establishment date");
                        }
                        else
                        { // year was not given, ensure end date is after sowing date
                            dateToHarvest = dateToHarvest.AddYears(1 + clock.Today.Year - dateToHarvest.Year);
                        }
                    }
                }

                management = new ScrumManagementInstance(cropName: CropName,
                                                         establishDate: clock.Today,
                                                         establishStage: EstablishStage,
                                                         plantingDepth: PlantingDepth,
                                                         harvestStage: HarvestStage,
                                                         expectedYield: ExpectedYield,
                                                         harvestDate: isHarvestDateDefined? dateToHarvest : null,
                                                         ttEstablishmentToHarvest: isThermalTimeDefined? Tt_EstablishToHarvest: double.NaN,
                                                         fieldLoss: FieldLoss,
                                                         residueRemoval: ResidueRemoval,
                                                         residueIncorporation: ResidueIncorporation,
                                                         residueIncorporationDepth: ResidueIncorporationDepth);
                ScrumCropInstance currentCrop =   Structure.FindChild<ScrumCropInstance>(CropName, recurse: true, relativeTo: (INodeModel)zone);
                currentCrop.Establish(management);
            }
        }

        /// <summary>Flag how harvest time is defined.</summary>
        public enum HarvestTimingOption
        {
            /// <summary>A date is to be used.</summary>
            SettingDate,
            /// <summary>A given thermal time sum is to be used.</summary>
            SettingThermalTime
        }
    }
}
```
          Manager AutomaticIrrigation: same as SingleCrop.Field.AutomaticIrrigation
          Manager AutomaticFertiliser
            FertiliserIsEnabled = True
            SeasonStartDate = 1-Aug
            SeasonEndDate = 30-Apr
            OnlyApplyOntoCrop = False
            SeasonsAllocation = 1000
            TriggerSoilN = 100
            AmountToApply = 100
            FertiliserType = UreaN
            ReturnDays = 3
            DepthToMonitor = 300
            LimitMonitoringDepth = False
            script: same as in SingleCrop.Field.AutomaticFertiliser
          Report: same as SingleCrop.Field.Report
          Manager EndSim
```csharp
using APSIM.Core;
using Models.PMF.SimplePlantModels;
using APSIM.Shared.Utilities;
using Models.PMF;
using Models.Soils.Nutrients;
using Models.Interfaces;
using Models.Core;
using System;

namespace Models
{
    [Serializable]
    public class Script : Model, IStructureDependency
    {
        [Link] private IClock clock;
        [Link] private ISummary Summary;
        [Link] private Simulation sim;
        [Link] private ScrumCropInstance sm;
        public IStructure Structure { private get; set; }
        

        

        [EventSubscribe("DoManagement")]
        private void OnDoManagement(object sender, EventArgs e)
        {
            
            if (clock.Today == sm.HarvestDate)
            {
                Structure.Set("Clock.EndDate", clock.Today.AddDays(1), relativeTo: sim);
            }
        }
    }
}
```
          ScrumCropInstance SCRUM_Wheat: HarvestIndex=0.5; MoistureContent=0; RootProportion=0.1; MaxRootDepth=3000; SurfaceKL=0.1; MaxHeight=1000; MaxCover=0.97; ExtinctionCoefficient=0.7; TypicalHarvestStage=Ripe; SeedlingNConc=0.05; ProductHarvestNConc=0.02; StoverHarvestNConc=0.01; RootNConc=0.01; LegumeFactor=0; BaseTemperature=0; OptimumTemperature=30; MaxTemperature=40; Tt_SowToEmergence=150; GSMax=0.008; R50=150; ConsiderWaterStress=true
    Experiment ResouceLimitation
      Memo
        This example shows how SCRUM responds to water and nitrogen stress
      Factors
        Permutation
          Factor _Irr
            CompositeFactor _No: Specifications=[AutomaticIrrigation].Script.Enabled = FALSE
            CompositeFactor _Yes: Specifications=[AutomaticIrrigation].Script.Enabled = TRUE
          Factor _Nit
            CompositeFactor _No: Specifications=[AutomaticFertiliser].Script.Enabled = FALSE
            CompositeFactor _Yes: Specifications=[AutomaticFertiliser].Script.Enabled = TRUE
      Simulation Test_ENK
        Weather: FileName=%root%/Examples/WeatherFiles/NZ_Lincoln.met
        Clock: Start=2010-09-20; End=2011-03-31
        Summary
        SoilArbitrator Soil Arbitrator
        Zone Field: Area=1; Slope=0; AspectAngle=0; Altitude=50
          Soil: SoilType=Mottled Immature Palic Soil; LocalName=Templeton; Site=A Block, PFR Research Farm; NearestTown=Lincoln; Region=Canterbury; Country=New Zealand; Latitude=-43.626; Longitude=172.468; YearOfSampling=2020
            DataSource=Data from analyses at PFR soil lab using samples from site, complemented with historical data from nearby studies and PTFs (Cichota et al, 2016). Pedological description by Thomas Caspari (MWLC)
            Comments=This represents an 'average' of the two profiles described at the site. Modified after sensibility tests and checks against field measured data.
            Memo
              # Notes

              Values for physical properties, particularly water storage limits and SWCon, were adjused after comparison against field-measured data.
              Values for FOM were based on expert opinion and adjusted after comparison with measured soil N data.
            Physical
              Thickness  ParticleSizeSand  ParticleSizeSilt  ParticleSizeClay  Rocks  BD     AirDry  LL15   DUL    SAT    KS
              100        15                63                22                0      1.23   0.05    0.145  0.3    0.535  480
              100        15                63                22                0      1.235  0.065   0.17   0.325  0.53   420
              200        12.5              66                21.5              0      1.375  0.07    0.18   0.35   0.481  240
              200        15                65                20                0      1.66   0.06    0.15   0.313  0.374  48
              200        5                 72.5              22.5              0      1.59   0.074   0.175  0.325  0.4    144
              200        45                47                8                 0      1.44   0.04    0.1    0.318  0.45   1200
              200        25                60                15                0      1.525  0.048   0.12   0.315  0.425  480
              200        60                35                5                 0      1.36   0.028   0.07   0.275  0.45   720
              200        50                44                6                 0      1.35   0.04    0.08   0.33   0.46   1200
              200        50                44                6                 0      1.35   0.032   0.08   0.3    0.455  1140
              SoilCrop SCRUMSoil
                LL=[0.145, 0.17, 0.18, 0.15, 0.175, 0.1, 0.12, 0.07, 0.08, 0.08]
                KL=[0.1, 0.1, 0.1, 0.1, 0.1, 0.1, 0.1, 0.1, 0.1, 0.1]
                XF=[1, 1, 1, 1, 1, 1, 1, 1, 1, 1]
            WaterBalance SoilWater: SummerDate=15-Oct; SummerU=8; SummerCona=4; WinterDate=15-Apr; WinterU=4.5; WinterCona=3; DiffusConst=88; DiffusSlope=35.4; Salb=0.2; CN2Bare=60; CNRed=20; CNCov=0.8; DischargeWidth=0; CatchmentArea=0; PSIDul=-100
              Thickness  SWCON  KLAT
              100        0.563  0
              100        0.56   0
              200        0.485  0
              200        0.489  0
              200        0.585  0
              200        0.545  0
              200        0.534  0
              200        0.508  0
              200        0.534  0
              200        0.533  0
            Organic: FOMCNRatio=40; CarbonUnits=Total
              Thickness  Carbon  SoilCNRatio  FBiom  FInert  FOM
              100        3       12           0.06   0.315   850
              100        2.75    12           0.046  0.522   500
              200        1.85    11.5         0.01   0.785   450
              200        0.4     10           0.008  0.899   175
              200        0.25    9.5          0.008  0.953   75
              200        0.2     9            0.008  0.969   25
              200        0.2     9            0.008  0.989   7.5
              200        0.15    9            0.008  0.99    2.5
              200        0.1     9            0.008  0.987   0
              200        0.1     9            0.008  0.988   0
            Chemical: Thickness=[150, 150, 300, 300, 300, 300, 300]; PH=[6.5, 6.5, 6.5, 6.5, 6.5, 6.5, 6.5]; PHUnits=Water
              CEC=[13.629, 13.0665, 10.7405, 7.245, 6.905, 5.601, 6.13, 5.6925, 5.177, 5.177]
              CEC source: Calculated
            Nutrient
            Water: Thickness=[100, 100, 200, 200, 200, 200, 200, 200, 200, 200]; FilledFromTop=false
              InitialValues=[0.2225, 0.2475, 0.265, 0.2315, 0.25, 0.209, 0.2175, 0.1725, 0.205, 0.19]
            OutputLayers OutputWaterLayers: Thickness=[200, 200, 200, 200, 200, 200, 200, 200, 200]
            OutputLayers OutputNutrientLayers: Thickness=[150, 150, 300, 300, 300, 300, 300]
            Solute NO3: Thickness=[150, 150, 300, 300, 300, 300, 300]; InitialValues=[1.4, 2.5, 11, 1.75, 1, 1, 1]; InitialValuesUnits=ppm; WaterTableConcentration=0; D0=0; DepthConstant=0; MaxDepthSoluteAccessible=0; RunoffEffectivenessAtMovingSolute=0; MaxEffectiveRunoff=0
            Solute NH4: Thickness=[150, 150, 300, 300, 300, 300, 300]; InitialValues=[1, 0.5, 0.1, 0.1, 0, 0, 0]; InitialValuesUnits=ppm; WaterTableConcentration=0; D0=0; DepthConstant=0; MaxDepthSoluteAccessible=0; RunoffEffectivenessAtMovingSolute=0; MaxEffectiveRunoff=0
            Solute Urea: same as Rotation.WheatSCRUMComplete.Field.Soil.Urea
            SoilTemperature Temperature
          SurfaceOrganicMatter: InitialResidueName=wheat; InitialResidueType=wheat; InitialResidueMass=2000; InitialStandingFraction=0; InitialCPR=0; InitialCNR=80
          MicroClimate: a_interception=0; b_interception=1; c_interception=0; d_interception=0; SoilHeatFluxFraction=0.4; MinimumHeightDiffForNewLayer=0; NightInterceptionFraction=0.5; ReferenceHeight=2
          Plant SCRUM
          Irrigation
          Fertiliser
          Manager CropManagement
            CropName = SCRUM_Wheat
            EstablishDate = 20/09/2010
            EstablishStage = Seed
            PlantingDepth = 20
            HarvestTimeOption = SettingDate
            HarvestDate = 28/02/2011
            Tt_EstablishToHarvest = 1000
            HarvestStage = Ripe
            ExpectedYield = 8
            FieldLoss = 0.05
            ResidueRemoval = 0.05
            ResidueIncorporation = 0.9
            ResidueIncorporationDepth = 100
            script: same as in Detailed Examples.EstablishAndHarvestAtDifferentStages.EstabAndHarv.Field.CropManagement
          Manager AutomaticIrrigation
            IrrigationIsEnabled = True
            SeasonStartDate = 20-Sep
            SeasonEndDate = 15-Dec
            OnlyApplyOntoCrop = True
            SeasonsAllocation = 1000
            TriggerFraction = 0.7
            RefillFraction = 0.9
            MaximumIrrigationAmount = 15
            ReturnDays = 5
            DepthToMonitor = 600
            LimitMonitoringDepth = True
            script: same as in SingleCrop.Field.AutomaticIrrigation
          Manager AutomaticFertiliser
            FertiliserIsEnabled = True
            SeasonStartDate = 20-Sep
            SeasonEndDate = 15-Dec
            OnlyApplyOntoCrop = True
            SeasonsAllocation = 500
            TriggerSoilN = 60
            AmountToApply = 30
            FertiliserType = NO3N
            ReturnDays = 7
            DepthToMonitor = 600
            LimitMonitoringDepth = True
            script: same as in SingleCrop.Field.AutomaticFertiliser
          Report ReportENK2: EventNames=[Clock].DoReport
            VariableNames:
              [AutomaticIrrigation].Script.AmountToApply
              [AutomaticIrrigation].Script.MonitoredLayerDUL
              [AutomaticIrrigation].Script.MonitoredLayerSW
              [AutomaticIrrigation].Script.MonitoredLayerTarget
              [AutomaticIrrigation].Script.MonitoredLayerTrigger
              [Clock].Today
              [Fertiliser].NitrogenApplied
              [Irrigation].IrrigationApplied
              [SCRUM].AboveGround.NConc
              [SCRUM].Arbitrator.DM.NutrientLimitation
              [SCRUM].Arbitrator.DM.SinkLimitation
              [SCRUM].Arbitrator.DM.TotalFixationSupply
              [SCRUM].Arbitrator.DM.TotalPlantDemand
              [SCRUM].Arbitrator.DM.TotalPlantSupply
              [SCRUM].Arbitrator.FN
              [SCRUM].Arbitrator.N.TotalPlantDemand
              [SCRUM].Arbitrator.N.TotalPlantSupply
              [SCRUM].Phenology.AccumulatedEmergedTt
              [SCRUM].Phenology.AccumulatedTt
              [SCRUM].Phenology.CurrentPhaseName
              [SCRUM].Phenology.CurrentStageName
              [SCRUM].Phenology.Stage
              [SCRUM].Phenology.ThermalTime
              [SCRUM].Product.Allocated.Wt
              [SCRUM].Product.CritNConc
              [SCRUM].Product.MaxNConc
              [SCRUM].Product.DMDemands.Structural.DMDemandFunction.PartitionFraction
              [SCRUM].Product.DryMatterContent
              [SCRUM].Product.ExpectedYield
              [SCRUM].Product.Live.N
              [SCRUM].Product.Live.NConc
              [SCRUM].Product.Live.Wt
              [SCRUM].Product.Yield
              [SCRUM].Root.Depth
              [SCRUM].Root.DMatHarvest
              [SCRUM].Root.DMDemands.Structural.DMDemandFunction.PartitionFraction
              [SCRUM].Root.Live.N
              [SCRUM].Root.Live.NConc
              [SCRUM].Root.Live.Wt
              [SCRUM].Root.WaterUptake
              [SCRUM].Root.FASW
              [SCRUM].Stover.CoverDead
              [SCRUM].Stover.CoverGreen
              [SCRUM].Stover.CoverTotal
              [SCRUM].Stover.MaxNConc
              [SCRUM].Stover.CritNConc
              [SCRUM].Stover.DMAtHarvest
              [SCRUM].Stover.DMDemands.Structural.DMDemandFunction.PartitionFraction
              [SCRUM].Stover.DMDemands.Structural
              [SCRUM].Stover.Fn
              [SCRUM].Stover.Fw
              [SCRUM].Stover.Height
              [SCRUM].Stover.LAI
              [SCRUM].Stover.LAIDead
              [SCRUM].Stover.LAITotal
              [SCRUM].Stover.Live.N
              [SCRUM].Stover.Live.NConc
              [SCRUM].Stover.Live.Wt
              [SCRUM].Stover.MinimumNConc
              [SCRUM].Stover.MaximumNConc
              [SCRUM].Stover.Photosynthesis
              [SCRUM].Stover.Transpiration
              [SCRUM].Stover.WaterDemand
              [SCRUM].Total.N
              [SCRUM].Total.Wt
              [SCRUM].Total.Wt/100 as TotalWt_ton
              [SCRUM].TotalDMAtHarvest
              [Soil].SoilWater.Drainage
              [Soil].SoilWater.Eo
              [Soil].SoilWater.Es
              [Soil].SoilWater.pond
              [Soil].SoilWater.Runoff
              [Soil].Water.MM
              [Soil].Nutrient.MineralN
              sum([Soil].Nutrient.MineralN) as ProfileN
              ([Soil].Nutrient.MineralN[1] +[Soil].Nutrient.MineralN[2]+[Soil].Nutrient.MineralN[3] +[Soil].Nutrient.MineralN[4]) as MinN_0_60
              sum([Soil].NO3.kgha)
              [Weather].Rain
          Manager EndSim: same as Detailed Examples.EstablishAndHarvestAtDifferentStages.EstabAndHarv.Field.EndSim
          ScrumCropInstance SCRUM_Wheat: HarvestIndex=0.45; MoistureContent=0.14; RootProportion=0.1; MaxRootDepth=1500; SurfaceKL=0.1; MaxHeight=1000; MaxCover=0.97; ExtinctionCoefficient=0.7; TypicalHarvestStage=Ripe; SeedlingNConc=0.05; ProductHarvestNConc=0.02; StoverHarvestNConc=0.01; RootNConc=0.01; LegumeFactor=0; BaseTemperature=0; OptimumTemperature=20; MaxTemperature=30; Tt_SowToEmergence=150; GSMax=0.008; R50=150; ConsiderWaterStress=true
    Experiment Defoliation
      Memo
        This example shows how biomass can be removed from SCRUM models using the BiomassRemovalsEvents model.  Note that SCRUM does not work with phenology rewinds so don't try to do that.
      Factors
        Permutation
          Factor Cuts
            CompositeFactor Zero: Specifications=[SCRUM_Cut].RemovalDates = 2001-07-15
            CompositeFactor OneEarly: Specifications=[SCRUM_Cut].RemovalDates = 2000-12-20
            CompositeFactor OneMid: Specifications=[SCRUM_Cut].RemovalDates = 2001-02-20
            CompositeFactor OneLate: Specifications=[SCRUM_Cut].RemovalDates = 2001-04-20
            CompositeFactor Two: Specifications=[SCRUM_Cut].RemovalDates = 2001-01-15, 2001-03-15
      Simulation SCRUMDefoliation
        Weather: FileName=%root%/Examples/WeatherFiles/NZ_Lincoln.met
        Clock: Start=2000-07-01; End=2001-06-30
        Summary
        SoilArbitrator Soil Arbitrator
        Zone Field: Area=1; Slope=0; AspectAngle=0; Altitude=50
          Soil: Latitude=0; Longitude=0
            Chemical: Thickness=[100, 200, 300, 300, 300, 300]; PH=[6.6, 6.2, 5.7, 5.5, 5.5, 5.5]; PHUnits=Water
            Water: Thickness=[100, 200, 300, 300, 300, 300]; InitialValues=[0.33, 0.33, 0.31, 0.15, 0.1, 0.06]; FilledFromTop=false
            Physical
              Thickness  BD   AirDry  LL15  DUL   SAT
              100        1.2  0.08    0.13  0.33  0.5
              200        1.2  0.13    0.13  0.33  0.5
              300        1.2  0.1     0.1   0.31  0.44
              300        1.2  0.06    0.06  0.15  0.46
              300        1.2  0.04    0.04  0.1   0.44
              300        1.2  0.02    0.02  0.06  0.44
              SoilCrop SCRUMSoil: LL=[0.13, 0.13, 0.1, 0.08, 0.11, 0.11]; KL=[0.1, 0.1, 0.1, 0.1, 0.1, 0.1]; XF=[1, 1, 1, 1, 1, 1]
              SoilCrop PotatoSoil: LL=[0.13, 0.13, 0.27, 0.27, 0.3, 0.3]; KL=[0.1, 0.06, 0.03, 0.01, 0, 0]; XF=[1, 1, 0.1, 0, 0, 0]
            WaterBalance SoilWater: same as SingleCrop.Field.Soil.SoilWater
            Nutrient
            Organic: same as SingleCrop.Field.Soil.Organic
            LayerStructure
              Thickness=[100, 100, 100, 100, 100, 100, 100, 100, 100, 100, 100, 100, 100, 100, 100]
            Solute NO3: same as SCRUMRotationFromManager.Field.Soil.NO3
            Solute NH4: same as SingleCrop.Field.Soil.NH4
            Solute Urea: same as SingleCrop.Field.Soil.Urea
            SoilTemperature Temperature
          SurfaceOrganicMatter: InitialResidueName=wheat; InitialResidueType=wheat; InitialResidueMass=2000; InitialStandingFraction=0; InitialCPR=0; InitialCNR=80
          MicroClimate: a_interception=0; b_interception=1; c_interception=0; d_interception=0; SoilHeatFluxFraction=0.4; MinimumHeightDiffForNewLayer=0; NightInterceptionFraction=0.5; ReferenceHeight=2
          Plant SCRUM
          Irrigation
          Fertiliser
          Manager CropManagement
            CropName = SCRUM_Ryegrass
            EstablishDate = 14/08/2000
            EstablishStage = Seed
            PlantingDepth = 15
            HarvestTimeOption = SettingDate
            HarvestDate = 01/06/2001
            Tt_EstablishToHarvest = 1000
            HarvestStage = Ripe
            ExpectedYield = 1.5
            FieldLoss = 0
            ResidueRemoval = 0
            ResidueIncorporation = 0
            ResidueIncorporationDepth = 0
            script: same as in Detailed Examples.EstablishAndHarvestAtDifferentStages.EstabAndHarv.Field.CropManagement
          Manager AutomaticIrrigation: same as SingleCrop.Field.AutomaticIrrigation
          Manager AutomaticFertiliser
            FertiliserIsEnabled = True
            SeasonStartDate = 1-Aug
            SeasonEndDate = 30-Apr
            OnlyApplyOntoCrop = True
            SeasonsAllocation = 1000
            TriggerSoilN = 50
            AmountToApply = 25
            FertiliserType = NO3N
            ReturnDays = 3
            DepthToMonitor = 300
            LimitMonitoringDepth = False
            script: same as in SingleCrop.Field.AutomaticFertiliser
          Report: EventNames=[Clock].DoReport
            VariableNames:
              [Clock].Today
              [SCRUM].SowingData.Cultivar
              // SCRUM Biomass
              [SCRUM].Total.Wt
              [SCRUM].Total.N
              [SCRUM].TotalDMAtHarvest
              [SCRUM].Product.Live.Wt
              [SCRUM].Product.Live.N
              [SCRUM].Product.Live.NConc
              [SCRUM].Product.DMAtHarvest
              [SCRUM].Product.ExpectedYield
              [SCRUM].Product.DryMatterContent
              [SCRUM].Product.Yield
              [SCRUM].Stover.Live.Wt
              [SCRUM].Stover.Live.N
              [SCRUM].Stover.Live.NConc
              [SCRUM].Stover.DMAtHarvest
              [SCRUM].Stover.Height
              [SCRUM].Stover.LAI
              [SCRUM].Stover.LAIDead
              [SCRUM].Stover.LAITotal
              [SCRUM].Stover.CoverDead
              [SCRUM].Stover.CoverGreen
              [SCRUM].Stover.CoverTotal
              [SCRUM].Root.Live.Wt
              [SCRUM].Root.Live.N
              [SCRUM].Root.Live.NConc
              [SCRUM].Root.DMatHarvest
              [SCRUM].Root.Depth
              // SCRUM Phenology
              [SCRUM].Phenology.AccumulatedEmergedTt
              [SCRUM].Phenology.AccumulatedTt
              [SCRUM].Phenology.CurrentPhaseName
              [SCRUM].Phenology.CurrentStageName
              [SCRUM].Phenology.Stage
              [SCRUM].Phenology.ThermalTime
              // SCRUM Allocation
              [SCRUM].Product.DMDemands.Structural.DMDemandFunction.PartitionFraction
              [SCRUM].Stover.DMDemands.Structural.DMDemandFunction.PartitionFraction
              [SCRUM].Root.DMDemands.Structural.DMDemandFunction.PartitionFraction
              [SCRUM].Arbitrator.DM.TotalPlantDemand
              [SCRUM].Arbitrator.DM.TotalFixationSupply
              [SCRUM].Arbitrator.N.TotalPlantDemand
              [SCRUM].Arbitrator.N.TotalPlantSupply
              [SCRUM].Arbitrator.N.TotalPlantSupply
              [SCRUM].Product.Allocated.Wt
              [SCRUM].Stover.Allocated.Wt
              [SCRUM].Root.Allocated.Wt
              // SCRUM limiting factors
              [SCRUM].Arbitrator.DM.NutrientLimitation
              [SCRUM].Arbitrator.DM.SinkLimitation
              [SCRUM].Arbitrator.FN
              [SCRUM].Stover.Fn
              [SCRUM].Stover.Fw
              // Water balance
              sum([Soil].SoilWater.SWmm) as SoilTotalWater
              [Soil].SoilWater.Drainage
              [Soil].SoilWater.Es
              [Soil].SoilWater.Runoff
              [Irrigation].IrrigationApplied
              [SCRUM].Stover.WaterDemand
              [SCRUM].Stover.Transpiration
              [SCRUM].Root.WaterUptake
              [AutomaticIrrigation].Script.AmountToApply
              [AutomaticIrrigation].Script.MonitoredLayerLL
              [AutomaticIrrigation].Script.MonitoredLayerDUL
              [AutomaticIrrigation].Script.MonitoredLayerSW
              [AutomaticIrrigation].Script.MonitoredLayerTarget
              [AutomaticIrrigation].Script.MonitoredLayerTrigger
              // Nitrogen balance
              sum([Soil].Nutrient.MineralN) as TotalSoilNitrogen
              [Fertiliser].NitrogenApplied
              [Soil].SoilWater.LeachNO3
              [Soil].Nutrient.DenitrifiedN
              [SCRUM].Root.NUptake
              [AutomaticFertiliser].Script.MonitoredLayerSoilN
              [AutomaticFertiliser].Script.AmountToApply
              // Biomass removal
              [SCRUM].Product.Removed.Wt
              [SCRUM].Stover.Removed.Wt
              [SCRUM].Root.Removed.Wt
              ([SCRUM].Product.Removed.Wt + [SCRUM].Stover.Removed.Wt + [SCRUM].Root.Removed.Wt) as SCRUM.Total.Removed.Wt
          ScrumCropInstance SCRUM_Ryegrass: HarvestIndex=0.14; MoistureContent=0.14; RootProportion=0.1; MaxRootDepth=1500; SurfaceKL=0.1; MaxHeight=500; MaxCover=0.97; ExtinctionCoefficient=0.86; TypicalHarvestStage=Ripe; SeedlingNConc=0.06; ProductHarvestNConc=0.02; StoverHarvestNConc=0.02; RootNConc=0.01; LegumeFactor=0; BaseTemperature=0; OptimumTemperature=20; MaxTemperature=35; Tt_SowToEmergence=200; GSMax=0.008; R50=150; ConsiderWaterStress=true
          BiomassRemovalEvents SCRUM_Cut: NameOfPlantToRemoveFrom=SCRUM; RemovalType=1; RemovalDates=[25/01/2001]
            BiomassRemovalFractions:
              PlantName  OrganName  TypeString  LiveToRemove  DeadToRemove  LiveToResidue  DeadToResidue
              SCRUM      Product    Grazing     0.5           0             0              1
              SCRUM      Stover     Grazing     0.5           0             0              1
              SCRUM      Root       Grazing     0             0             0              0
              SCRUM      Nodule     Grazing     0             0             0              0
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