Simulations: Version=159
  DataStore
  Folder Tutorial
    Simulation HowToCreateNewSolute
      Memo
        SWIM will discover solutes or tracers automatically.

        To create a new solute:

        1. Add a *Solute* to the *soil* node (right click on *soil* and choose *Solute* from the *Soils,Nutrients* folder)
        2. Rename the solute (e.g. to *Br*)
        3. Add a *SwimSoluteParameters* to the swim node (right click on *swim* and choose *SwimSoluteParameters* from the *Soils* folder)
        4. Rename the *SwimSoluteParameters* to the same name as the solute (e.g. to *Br*)
        5. Parameterise as necessary (adding EXCO and FIP)

        To report the value of the solute use:

                [Br].kgha

        Solutes canb be initialied in the Soil node (ppm of solute in soil) or using the InitialiseCl/Br Manager script (in kg solute /ha). The Manager is more flexible as it allows the setting and/or addition of the named solute on multiple dates. Note also that solutes initialised in the Soil node can undergo some movement at the very beginning of the simulation (conceptually before hte first day) that is not included for solutes added at the beginning of the first day of simulation.

        The graph at the bottom shows that SWIM is moving the Br (symbols) in the same way as Cl, which is expected given the two solutes are parameterised identically.
      ControlledEnvironment: Rain=10; AirPressure=1010
        zero: MaxT, MinT, Radn, PanEvap, VP, Wind, CO2, DiffuseFraction, Latitude, Longitude, DayLength, SunRise, SunSet
      Clock: Start=2000-01-01; End=2000-06-30
      Summary summaryfile
      SoilArbitrator
      MicroClimate: a_interception=0; b_interception=0; c_interception=0; d_interception=0; SoilHeatFluxFraction=0; MinimumHeightDiffForNewLayer=0; NightInterceptionFraction=0; ReferenceHeight=2
      Zone paddock: Area=1; Slope=0; AspectAngle=0; Altitude=50
        Manager InitialiseCl
          SoluteName = Cl
          SetAdd = Set
          DateCsvString = 1/01/2000
          ValueCsvString = 100,0,0,0,0,0,0,0
```csharp
using Models.Climate;
using APSIM.Shared.Utilities;
using Models.Soils.Nutrients;
using Models.Soils;
using Models.Core;
using System;
using System.Collections.Generic;
using Models.AgPasture;
using Models.Interfaces;
using System.Linq;

namespace Models
{
    [Serializable] 
    [System.Xml.Serialization.XmlInclude(typeof(Model))]
    public class Script : Model
    {
        [Link] Clock clock;
        [Link] ISummary summary;
        [Link] private Solute[] solutes;

        private Solute solute;
        private List<DateTime> dates = new List<DateTime>();
        private List<double> values = new List<double>();

        public enum SetAddType { Set, Add }

        [Description("Name of solute:")]
        public string SoluteName { get; set; }

        [Description("Set the value of the solute or add a delta to it?")]
        public SetAddType SetAdd { get; set; }

        [Description("Dates (csv) for setting (adding to) the solute:")]
        public string DateCsvString { get; set; }

        [Description("Values (csv) kg/ha:")]
        public string ValueCsvString { get; set; }
  
        
        public double SoluteAdded { get; set; }

        [EventSubscribe("StartOfSimulation")]
        private void OnStartOfSimulation(object sender, EventArgs e)
        {
            solute = Array.Find(solutes, s => s.Name.Equals(SoluteName, StringComparison.InvariantCultureIgnoreCase));
            if (solute == null)
                throw new Exception($"Cannot find solute {SoluteName}");
        
            var dateStrings = DateCsvString.Split(",", StringSplitOptions.RemoveEmptyEntries);
            foreach (var d in dateStrings)
               dates.Add(DateTime.Parse(d));

            var valueStrings = ValueCsvString.Split(",", StringSplitOptions.RemoveEmptyEntries);
            foreach (var v in valueStrings)
               values.Add(Convert.ToDouble(v));
        }
        
        
        [EventSubscribe("DoDailyInitialisation")] private void DoDailyInitialisation(object sender, EventArgs e)
        {
               SoluteAdded = 0.0;
            foreach (var d in dates)
            {
                if (clock.Today == d) 
                {
                    if (SetAdd == SetAddType.Add)
                        solute.AddKgHaDelta(SoluteSetterType.Other, values.ToArray());
                    else
                        solute.SetKgHa(SoluteSetterType.Other, values.ToArray());
                    
                    SoluteAdded = solute.kgha.Sum();
                }
            }
        }
    }
}
```
        Manager InitialiseBr
          SoluteName = Br
          SetAdd = Set
          DateCsvString = 1/01/2000
          ValueCsvString = 100,0,0,0,0,0,0,0
          script: same as in Tutorial.HowToCreateNewSolute.paddock.InitialiseCl
        SurfaceOrganicMatter: InitialResidueName=grass; InitialResidueType=grass; InitialResidueMass=0; InitialStandingFraction=0; InitialCPR=0; InitialCNR=17
        Soil: SoilType=Loam; LocalName=Horotiu; Site=Ruakura, south of Railway Ln; NearestTown=Hamilton; Region=Waikato; Country=New Zealand; NaturalVegetation=long term grass; ApsoilNumber=1320; Latitude=-37.779; Longitude=175.304; LocationAccuracy=+/-50 m; YearOfSampling=1984
          DataSource=The database of New Zealand soils was compiled by AgResearch (www.agresearch.co.nz) and based on soil properties gathered, mainly from publications, in the course of conducting several simulation-based research projects but particularly from the Pastoral 21 Environment program which was funded by the New Zealand Ministry for Business, Innovation and Employment,  Dairy NZ, Fonterra and Meat & Wool NZ.
          Comments=Gravel soil. The bulk density of this APSoil reflects weight of fine-earth fraction per volume of bulk soil. Use with gravimetric water contents measured on the fine-earth fraction. Gravel assumed to not hold water as reflected in low SAT, DUL, LL15, LL and AD. The data is a combination of published or supplied measurements, pedotransfer functions, and expert opinion. See Cichota et al. (2013; Soil Research 51: 92-111, http://dx.doi.org/10.1071/SR12338) for a description of the pedotransfer functions. The soil carbon and fresh organic matter settings have been set as those broadly appropriate for permanent productive pastoral systems, see Cichota el al. (2012; Soil Research 50: 694-707, http://dx.doi.org/10.1071/SR12208). Users should take care to adapt these to local conditions before using the data in simulations. FOM values estimated to be 900 kg/ha of FOM in top 600mm of soil and another 100 kg/ha below.
          Physical
            Thickness  ParticleSizeClay  ParticleSizeSand  ParticleSizeSilt  Rocks  BD     AirDry  LL15   DUL    SAT    KS
            60         17.61             33.77             48.62             0      0.865  0.081   0.246  0.511  0.588  13367.955
            110        16.36             33.91             49.73             0      0.835  0.068   0.207  0.451  0.605  7114.419
            140        16.42             35.91             47.67             0      0.805  0.067   0.203  0.439  0.616  6216.357
            240        29.03             46.26             24.71             0      0.83   0.085   0.259  0.419  0.625  3256.961
            200        18.44             53.54             28.02             0      0.82   0.091   0.276  0.414  0.628  6716.918
            200        32.64             45.98             21.38             0      0.815  0.094   0.286  0.429  0.633  2348.283
            200        9.49              63.84             26.67             0      0.944  0.075   0.227  0.364  0.552  18003.598
            350        1                 93.21             5.79              0      1.063  0.015   0.045  0.092  0.312  62350.094
            BD source: Field measured and checked for sensibility
            AirDry source: Estimated based on local knowledge
            LL15, DUL source: Laboratory measured
            SAT source: Calculated from measured, estimated or calculated BD
          Nutrient
          Organic: FOMCNRatio=40; CarbonUnits=Total
            Thickness  Carbon  SoilCNRatio  FBiom  FInert  FOM
            60         0       10.649       0.08   0.597   0
            110        0       10.649       0.072  0.642   0
            140        0       10.649       0.026  0.777   0
            240        0       10.649       0.008  0.896   0
            200        0       10.649       0.008  0.957   0
            200        0       10.649       0.008  0.975   0
            200        0       10.649       0.008  0.992   0
            350        0       10.649       0.008  0.986   0
          Chemical: Thickness=[60, 110, 140, 240, 200, 200, 200, 350]; PH=[6.5, 6.5, 6.5, 6.5, 6.5, 6.5, 6.5, 6.5]; PHUnits=Water
            PH source: Estimated based on local knowledge
          Water: Thickness=[60, 110, 140, 240, 200, 200, 200, 350]; InitialValues=[0.511, 0.451, 0.439, 0.419, 0.414, 0.429, 0.364, 0.092]; RelativeTo=LL15; FilledFromTop=false
          Swim3 Swim: Salb=0.13; CN2Bare=50; CNRed=20; CNCov=0.8; KDul=1; PSIDul=-100; VC=true; DTMin=0; DTMax=30; MaxWaterIncrement=5; SpaceWeightingFactor=0; SoluteSpaceWeightingFactor=0; Dis=0; Disp=1; A=2; DTHC=0.1; DTHP=2; Diagnostics=false
          Solute Cl: InitialValuesUnits=ppm; WaterTableConcentration=0; D0=0.05; DepthConstant=0; MaxDepthSoluteAccessible=0; RunoffEffectivenessAtMovingSolute=0; MaxEffectiveRunoff=0
            Thickness  InitialValues  Exco  FIP
            60         0              0     1
            110        0              0     1
            140        0              0     1
            240        0              0     1
            200        0              0     1
            200        0              0     1
            200        0              0     1
            350        0              0     1
          Solute Br: same as Tutorial.HowToCreateNewSolute.paddock.Soil.Cl
          LayerStructure: Thickness=[10, 20, 30, 40, 50, 50, 50, 50, 100, 100, 50, 50, 50, 50]
          SoilTemperature
          Solute NO3: same as Tutorial.HowToCreateNewSolute.paddock.Soil.Cl
          Solute NH4: InitialValuesUnits=ppm; WaterTableConcentration=0; D0=5; DepthConstant=0; MaxDepthSoluteAccessible=0; RunoffEffectivenessAtMovingSolute=0; MaxEffectiveRunoff=0
            Thickness  InitialValues  Exco  FIP
            60         0              0     1
            110        0              0     1
            140        0              0     1
            240        0              0     1
            200        0              0     1
            200        0              0     1
            200        0              0     1
            350        0              0     1
          Solute Urea: InitialValuesUnits=kg/ha; WaterTableConcentration=0; D0=0.05; DepthConstant=0; MaxDepthSoluteAccessible=0; RunoffEffectivenessAtMovingSolute=0; MaxEffectiveRunoff=0
            Thickness  InitialValues  Exco  FIP
            60         0              0     1
            110        0              0     1
            140        0              0     1
            240        0              0     1
            200        0              0     1
            200        0              0     1
            200        0              0     1
            350        0              0     1
        Irrigation
        Fertiliser
        Report: EventNames=[Clock].EndOfDay
          VariableNames:
            [Clock].Today as Date
            sum([Soil].Cl.kgha) as Cl
            sum([Soil].Br.kgha) as Br
    Simulation HowToAddSolutesInIrrigationWater
      Memo
        Solutes can be added with irrigation water. To do this, specify the amount of solute (kg/ha) when using the *Irrigation.Apply* method. For example:

        	2000-01-01 [Irrigation].Apply(amount:100,duration:60, no3:5);

        The units for amount of solute is kg/ha. Currently, only NO3 and NH4 can be added with irrigation.

        This simulation adds four irrigations (through the *AddIrrigation* manager script), each with 5 kg/ha of NO3.

        The graph shows the four increases in NO3 coinciding with each irrigation event.

        Notes:

        1. SWIM will potentially send excess surface water to runoff, regardless of whether it is rainfall or irrigation water. The Irrigation.Apply method has a boolean argument called 'willRunoff' to indictate whether irrigation water should potentially runoff or not. SWIM ignores this property. The result is that irrigation water may potentially be lost through runoff.

        2. Runoff water in SWIM does not contain solutes at this time but this may be added in future releases.

        3. There is no soil or wind erosion in APSIM.
      ControlledEnvironment: Rain=10; AirPressure=1010
        zero: MaxT, MinT, Radn, PanEvap, VP, Wind, CO2, DiffuseFraction, Latitude, Longitude, DayLength, SunRise, SunSet
      Clock: Start=2000-01-01; End=2000-06-30
      Summary summaryfile
      SoilArbitrator
      MicroClimate: a_interception=0; b_interception=0; c_interception=0; d_interception=0; SoilHeatFluxFraction=0; MinimumHeightDiffForNewLayer=0; NightInterceptionFraction=0; ReferenceHeight=2
      Zone paddock: Area=1; Slope=0; AspectAngle=0; Altitude=50
        Operations AddIrrigation
          2000-01-10  [Irrigation].Apply(amount:10,duration:60, no3:5);
          2000-02-10  [Irrigation].Apply(amount:10,duration:60, no3:5);
          2000-03-10  [Irrigation].Apply(amount:10,duration:60, no3:5);
          2000-04-10  [Irrigation].Apply(amount:10,duration:60, no3:5);
        SurfaceOrganicMatter: InitialResidueName=grass; InitialResidueType=grass; InitialResidueMass=0; InitialStandingFraction=0; InitialCPR=0; InitialCNR=17
        Soil: SoilType=Loam; LocalName=Horotiu; Site=Ruakura, south of Railway Ln; NearestTown=Hamilton; Region=Waikato; Country=New Zealand; NaturalVegetation=long term grass; ApsoilNumber=1320; Latitude=-37.779; Longitude=175.304; LocationAccuracy=+/-50 m; YearOfSampling=1984
          DataSource=The database of New Zealand soils was compiled by AgResearch (www.agresearch.co.nz) and based on soil properties gathered, mainly from publications, in the course of conducting several simulation-based research projects but particularly from the Pastoral 21 Environment program which was funded by the New Zealand Ministry for Business, Innovation and Employment,  Dairy NZ, Fonterra and Meat & Wool NZ.
          Comments=Gravel soil. The bulk density of this APSoil reflects weight of fine-earth fraction per volume of bulk soil. Use with gravimetric water contents measured on the fine-earth fraction. Gravel assumed to not hold water as reflected in low SAT, DUL, LL15, LL and AD. The data is a combination of published or supplied measurements, pedotransfer functions, and expert opinion. See Cichota et al. (2013; Soil Research 51: 92-111, http://dx.doi.org/10.1071/SR12338) for a description of the pedotransfer functions. The soil carbon and fresh organic matter settings have been set as those broadly appropriate for permanent productive pastoral systems, see Cichota el al. (2012; Soil Research 50: 694-707, http://dx.doi.org/10.1071/SR12208). Users should take care to adapt these to local conditions before using the data in simulations. FOM values estimated to be 900 kg/ha of FOM in top 600mm of soil and another 100 kg/ha below.
          Physical
            Thickness  ParticleSizeClay  ParticleSizeSand  ParticleSizeSilt  Rocks  BD     AirDry  LL15   DUL    SAT    KS
            60         17.61             33.77             48.62             0      0.865  0.081   0.246  0.511  0.588  13367.955
            110        16.36             33.91             49.73             0      0.835  0.068   0.207  0.451  0.605  7114.419
            140        16.42             35.91             47.67             0      0.805  0.067   0.203  0.439  0.616  6216.357
            240        29.03             46.26             24.71             0      0.83   0.085   0.259  0.419  0.625  3256.961
            200        18.44             53.54             28.02             0      0.82   0.091   0.276  0.414  0.628  6716.918
            200        32.64             45.98             21.38             0      0.815  0.094   0.286  0.429  0.633  2348.283
            200        9.49              63.84             26.67             0      0.944  0.075   0.227  0.364  0.552  18003.598
            350        1                 93.21             5.79              0      1.063  0.015   0.045  0.092  0.312  62350.094
            BD source: Field measured and checked for sensibility
            AirDry source: Estimated based on local knowledge
            LL15, DUL source: Laboratory measured
            SAT source: Calculated from measured, estimated or calculated BD
          Nutrient
          Organic: same as Tutorial.HowToCreateNewSolute.paddock.Soil.Organic
          Chemical: same as Tutorial.HowToCreateNewSolute.paddock.Soil.Chemical
          Water: Thickness=[60, 110, 140, 240, 200, 200, 200, 350]; InitialValues=[0.511, 0.451, 0.439, 0.419, 0.414, 0.429, 0.364, 0.092]; FilledFromTop=false
          Swim3 Swim: same as Tutorial.HowToCreateNewSolute.paddock.Soil.Swim
          LayerStructure: Thickness=[10, 20, 30, 40, 50, 50, 50, 50, 100, 100, 50, 50, 50, 50]
          SoilTemperature
          Solute NO3: InitialValuesUnits=ppm; WaterTableConcentration=0; D0=0.05; DepthConstant=0; MaxDepthSoluteAccessible=0; RunoffEffectivenessAtMovingSolute=0; MaxEffectiveRunoff=0
            Thickness  InitialValues  Exco  FIP
            60         1              0     1
            110        1              0     1
            140        1              0     1
            240        1              0     1
            200        1              0     1
            200        1              0     1
            200        1              0     1
            350        1              0     1
          Solute NH4: same as Tutorial.HowToCreateNewSolute.paddock.Soil.NH4
          Solute Urea: same as Tutorial.HowToCreateNewSolute.paddock.Soil.Urea
        Irrigation
        Fertiliser
        Report: EventNames=[Clock].EndOfDay
          VariableNames:
            [Clock].Today as Date
            sum([NO3].kgha) as NO3
            [Irrigation].IrrigationApplied as Irrigation
            [SWIM].LeachNO3 as NO3Leached
    Simulation HowToAddTileDrainage
      Memo
        To simulate a tile drained soil, right-click on the SWIM model in Soil and add SwimSubsurfaceDrain and fill in the fields in the component describing the drainage system.

        With a tile drained system, usually the lower boudary condition needed is a constant gradient (the default, so co additional action is needed). When adding tile drains, ensure that the soil profile extends well below the drain depth and that you have set sensible (i.e., poorly-drained) soil properties at and below the depth of the drains.

        The simulation below shows a simulation with a drain configured with a depth to impermeable layer of 1000 mm. Note that there is a combination of tile and normal drainage and that the water table depth varies during the simulation.
      Weather
        FileName=C:\Users\RIC394\source\repos\ric394\ApsimX\Examples\WeatherFiles\lincoln.met
      Clock: Start=2000-01-01; End=2000-01-31
      Summary summaryfile
      SoilArbitrator
      MicroClimate: a_interception=0; b_interception=0; c_interception=0; d_interception=0; SoilHeatFluxFraction=0; MinimumHeightDiffForNewLayer=0; NightInterceptionFraction=0; ReferenceHeight=2
      Zone paddock: Area=1; Slope=0; AspectAngle=0; Altitude=50
        Operations AddIrrigation
          2000-01-10  [Irrigation].Apply(amount:100,duration:60);
          2000-01-15  [Irrigation].Apply(amount:100,duration:60);
        SurfaceOrganicMatter: InitialResidueName=grass; InitialResidueType=grass; InitialResidueMass=0; InitialStandingFraction=0; InitialCPR=0; InitialCNR=17
        Soil: SoilType=Loam; LocalName=Horotiu; Site=Ruakura, south of Railway Ln; NearestTown=Hamilton; Region=Waikato; Country=New Zealand; NaturalVegetation=long term grass; ApsoilNumber=1320; Latitude=-37.779; Longitude=175.304; LocationAccuracy=+/-50 m; YearOfSampling=1984
          DataSource=The database of New Zealand soils was compiled by AgResearch (www.agresearch.co.nz) and based on soil properties gathered, mainly from publications, in the course of conducting several simulation-based research projects but particularly from the Pastoral 21 Environment program which was funded by the New Zealand Ministry for Business, Innovation and Employment,  Dairy NZ, Fonterra and Meat & Wool NZ.
          Comments=Gravel soil. The bulk density of this APSoil reflects weight of fine-earth fraction per volume of bulk soil. Use with gravimetric water contents measured on the fine-earth fraction. Gravel assumed to not hold water as reflected in low SAT, DUL, LL15, LL and AD. The data is a combination of published or supplied measurements, pedotransfer functions, and expert opinion. See Cichota et al. (2013; Soil Research 51: 92-111, http://dx.doi.org/10.1071/SR12338) for a description of the pedotransfer functions. The soil carbon and fresh organic matter settings have been set as those broadly appropriate for permanent productive pastoral systems, see Cichota el al. (2012; Soil Research 50: 694-707, http://dx.doi.org/10.1071/SR12208). Users should take care to adapt these to local conditions before using the data in simulations. FOM values estimated to be 900 kg/ha of FOM in top 600mm of soil and another 100 kg/ha below.
          Physical
            Thickness  ParticleSizeClay  ParticleSizeSand  ParticleSizeSilt  Rocks  BD   AirDry  LL15   DUL    SAT   KS
            60         18.44             53.54             28.02             0      1.3  0.091   0.276  0.414  0.45  100
            110        18.44             53.54             28.02             0      1.3  0.091   0.276  0.414  0.45  50
            140        18.44             53.54             28.02             0      1.3  0.091   0.276  0.414  0.45  25
            240        18.44             53.54             28.02             0      1.3  0.091   0.276  0.414  0.45  3
            200        18.44             53.54             28.02             0      1.3  0.091   0.276  0.414  0.45  3
            200        18.44             53.54             28.02             0      1.3  0.091   0.276  0.414  0.42  1
            200        18.44             53.54             28.02             0      1.3  0.091   0.276  0.414  0.42  0.5
            350        18.44             53.54             28.02             0      1.3  0.091   0.276  0.414  0.42  0.1
            BD source: Field measured and checked for sensibility
            AirDry source: Estimated based on local knowledge
            LL15, DUL source: Laboratory measured
            SAT source: Calculated from measured, estimated or calculated BD
          Nutrient
          Organic: FOMCNRatio=40; CarbonUnits=Total
            Thickness  Carbon  SoilCNRatio  FBiom  FInert  FOM
            60         8.2     10.649       0.08   0.597   26.6765
            110        5.5     10.649       0.072  0.642   21.4084
            140        3.3     10.649       0.026  0.777   16.1801
            240        1.7     10.649       0.008  0.896   10.012
            200        1.7     10.649       0.008  0.957   6.71124
            200        1.2     10.649       0.008  0.975   4.49868
            200        0.7     10.649       0.008  0.992   3.01555
            350        0.1     10.649       0.008  0.986   1.49748
          Chemical: same as Tutorial.HowToCreateNewSolute.paddock.Soil.Chemical
          Water: Thickness=[60, 110, 140, 240, 200, 200, 200, 350]; InitialValues=[0.414, 0.414, 0.414, 0.414, 0.414, 0.414, 0.414, 0.414]; RelativeTo=LL15; FilledFromTop=false
          Swim3 Swim: Salb=0.13; CN2Bare=0; CNRed=20; CNCov=0.8; KDul=1; PSIDul=-100; VC=true; DTMin=0; DTMax=1440; MaxWaterIncrement=10; SpaceWeightingFactor=0; SoluteSpaceWeightingFactor=1; Dis=0; Disp=1; A=2; DTHC=0.1; DTHP=2; Diagnostics=false
            SwimSubsurfaceDrain: DrainDepth=500; DrainSpacing=5000; DrainRadius=150; Klat=1000; ImpermDepth=1000
          Solute Cl: same as Tutorial.HowToCreateNewSolute.paddock.Soil.Cl
          LayerStructure
            Thickness=[10, 20, 30, 40, 50, 50, 50, 50, 100, 100, 50, 50, 50, 50, 50, 50, 50, 50, 75, 25]
          SoilTemperature
          Solute NO3: same as Tutorial.HowToCreateNewSolute.paddock.Soil.Cl
          Solute NH4: InitialValuesUnits=ppm; WaterTableConcentration=0; D0=5; DepthConstant=0; MaxDepthSoluteAccessible=0; RunoffEffectivenessAtMovingSolute=0; MaxEffectiveRunoff=0
            Thickness  InitialValues  Exco  FIP
            60         0              5     1
            110        0              5     1
            140        0              5     1
            240        0              5     1
            200        0              5     1
            200        0              5     1
            200        0              5     1
            350        0              5     1
          Solute Urea: same as Tutorial.HowToCreateNewSolute.paddock.Soil.Urea
        Irrigation
        Fertiliser
        Report: EventNames=[Clock].EndOfDay
          VariableNames:
            [Clock].Today as Date
            [Soil].Swim.SubsurfaceDrain as SubsurfaceDrainage
            [Soil].Swim.Drainage as Drainage
            sum([Soil].Swim.SWmm) as WaterStorage
            [Soil].Swim.WaterTable as WaterTableDepth
    Simulation HowToSetASeepageLowerBoundaryCondition
      Memo
        By default, if no action is taken, SWIM will use a gradient lower boundary condition and this is what will be used in most simulations - but there are exceptions.

        The "seepage" boundary condition is when there is a column of soil that is not hydraulically connected to the lower soil as in a lysimeter. In such cases a small head of water must accumulate at the base of the soil profile before it can drain. To set this boundary condition use the "SWIM3_SetLowerBC" Manager component. Note that the second parameter in the component is not used in this particular boundary condition.

        The simulation below shows a simulation with a seepage boundary condition set.
      Weather
        FileName=C:\Users\RIC394\source\repos\ric394\ApsimX\Examples\WeatherFiles\lincoln.met
      Clock: Start=2000-01-01; End=2005-01-31
      Summary summaryfile
      SoilArbitrator
      MicroClimate: a_interception=0; b_interception=0; c_interception=0; d_interception=0; SoilHeatFluxFraction=0; MinimumHeightDiffForNewLayer=0; NightInterceptionFraction=0; ReferenceHeight=2
      Forages
        Parameters:
          Name                          IsLive  DigestibilityString  FractionConsumable  MinimumAmount  UseDigestibilityFromModel
          SurfaceOrganicMatter.Residue  true    0.7                  0                   100            false
          SurfaceOrganicMatter.Residue  false   0.3                  0                   0              false
          AGPRyegrass.Leaf              true    0.7                  1                   100            false
          AGPRyegrass.Leaf              false   0.3                  1                   0              false
          AGPRyegrass.Stem              true    0.7                  1                   100            false
          AGPRyegrass.Stem              false   0.3                  1                   0              false
          AGPRyegrass.Stolon            true    0.7                  1                   100            false
          AGPRyegrass.Stolon            false   0.3                  1                   0              false
          AGPWhiteClover.Leaf           true    0.7                  1                   100            false
          AGPWhiteClover.Leaf           false   0.3                  1                   0              false
          AGPWhiteClover.Stem           true    0.7                  1                   100            false
          AGPWhiteClover.Stem           false   0.3                  1                   0              false
          AGPWhiteClover.Stolon         true    0.7                  1                   100            false
          AGPWhiteClover.Stolon         false   0.3                  1                   0              false
      Zone paddock: Area=1; Slope=0; AspectAngle=0; Altitude=50
        Manager SWIM3_SetLowerBC
          LowerBCType = seepage
          LowerBCValue = -500
```csharp
using Models.Climate;
using APSIM.Shared.Utilities;
using Models.Soils.Nutrients;
using Models.Soils;
using Models.PMF;
using Models.Core;
using System.Xml.Serialization;
using System;
using Models.AgPasture;
using Models.Interfaces;

namespace Models
{
    [Serializable] 
    [System.Xml.Serialization.XmlInclude(typeof(Model))]
    public class Script : Model
    {
        [Link] Clock clock;
        [Link] ISummary summary;
        [Link] private Swim3 swim;
        //[Link] private PastureSpecies ryegrass;
        //[Link] private SimpleGrazing grazing;
        
        public enum LowerBCTypeOptions {gradient,seepage,potential};

        [Separator("Sets the lower boundary condition type (and value if set to 'potential' for SWIM3. The change is applied at the beginning of the first day of the simulation.")]
        [Description("[Get a dropdown] What lower boundary condition is wanted?")] public LowerBCTypeOptions LowerBCType { get; set; }
        [Description("If 'potential', then what potential? (mm) ")] public double LowerBCValue { get; set; }

        public double SoilWaterStart  { get; set; }
        public double SoilWaterEnd  { get; set; }

        [EventSubscribe("DoDailyInitialisation")]
        private void DoDailyInitialisation(object sender, EventArgs e)
        {
        }

        [EventSubscribe("DoReportCalculations")]
        private void DoReportCalculations(object sender, EventArgs e)
        {
        }

        [EventSubscribe("DoManagement")]
        private void DoDailyCalculations(object sender, EventArgs e)
        {
            if (clock.Today == clock.StartDate)
            {
                summary.WriteMessage(this, "Script is setting lower boundary condition to " + LowerBCType, MessageType.Diagnostic);
                if (LowerBCType == LowerBCTypeOptions.gradient)
                    swim.SetLowerBCForGradient(bbcGradient: 0.0);   // in cm/cm (ibbc=0) Note that this is the default setting
                else if (LowerBCType == LowerBCTypeOptions.potential)
                    swim.SetLowerBCForGivenPotential(bbcPotential: LowerBCValue /10.0 );    //  convert to cm (ibbc=1), DUL is -100 cm so values more positive will often result in inflow to the bottom of the soil profile. Input in mm so divide here.
                else if (LowerBCType == LowerBCTypeOptions.seepage)
                    swim.SetLowerBCForSeepage(bbcPotentialSeepage: 0.0);  // in cm (ibbc=3). This is for zero-tension lysimeters
                else
                    throw new Exception("Wrong lower boundary condition type");
            }
        }
    }
}
```
        Manager AutomaticIrrigation
          allowIrrigation = True
          seasonStart = 1-sep
          seasonEnd = 30-mar
          seasonsAllocation = 10000
          triggerDeficit = 80
          targetDeficit = 100
          returndays = 3
          maximumAmount = 30
          depthPAWC = 300
```csharp
using Newtonsoft.Json;
using APSIM.Shared.Utilities;
using System.Xml.Serialization;
using Models.Soils;
using Models.PMF;
using Models.Core;
using System;
using Models.Interfaces;



        
namespace Models
{
    [Serializable] 
    [System.Xml.Serialization.XmlInclude(typeof(Model))]
    public class Script : Model
    {
        [Link] private ISummary summary;
        [Link] private Irrigation Irrigation;
        [Link] private Clock Clock;
        [Link] private Soil Soil;
        [Link(IsOptional = true)] private IPlant existingCrop;
        private DateTime StartDate;
        private DateTime EndDate;
        private double TopDUL;
        private double TopLL;
        private int nLayers;
        [Link]
        private IPhysical soilPhysical;
        [Link]
        private ISoilWater waterBalance;
        //Communication to other modules
       
        //User inputs from properties tab
        [Description("Turn irrigation on?")]
        public bool allowIrrigation { get; set; }
        [Description("Start of irrigation season (dd-MMM)")]
        public string seasonStart { get; set; }
        [Description("End of irrigation season (dd-MMM)")]
        public string seasonEnd { get; set; }
        [Description("Season allocation (mm)")]
        public double seasonsAllocation { get; set; }
        [Description("Deficit to trigger irrigation (% PAWC)")]
        public double triggerDeficit { get; set; }
        [Description("Deficit to stop irrigaton (% PAWC)")]
        public double targetDeficit { get; set; }
        [Description("Minimum days for irrigation to return")]
        public double returndays { get; set; }
        [Description("Maximum irrigation application (mm/day)")]
        public double maximumAmount { get; set; }
        [Description("Depth to calculate PAWC (mm)")]
        public double depthPAWC { get; set; }

        //Class members
        [JsonIgnore] public double TopSWdeficit { get; set; }
        [JsonIgnore] public double TopSWC { get; set; }
        [JsonIgnore] public double DaysSinceIrrigation { get; set; }
        [JsonIgnore] public double AmountToApply { get; set; }
        [JsonIgnore] public double SeasonAppliedAmount { get; set; }
        
        private bool IrrigationIsAllowed { get; set; }
        private bool SeasonIsOpen { get; set; }
        private bool CropIsActive { get; set; }
        private bool IrrigatorIsAvailable { get; set; }
        private bool SoilIsDry { get; set; }

    
        //Calculate static soil variables
        [EventSubscribe("StartOfSimulation")]
        private void OnStartOfSimulation(object sender, EventArgs e)
        {   
            //Set the season dates
            StartDate = DateTime.Parse(seasonStart + "-" + Clock.Today.Year.ToString());
            EndDate = DateTime.Parse(seasonEnd + "-" + Clock.Today.Year.ToString());
            
            //Can we irrigate at all?
            IrrigationIsAllowed = false; 
            if (allowIrrigation)
                IrrigationIsAllowed = true; 

            //Calculate soil water variables
            double depthFromSurface = 0.0;
            double fracLayer = 0.0;
            nLayers = soilPhysical.Thickness.Length;
            for (int layer = 0; layer < nLayers; layer++)
            {
                fracLayer = Math.Min(1.0, (depthPAWC - depthFromSurface) / soilPhysical.Thickness[layer]);
                TopLL += soilPhysical.LL15mm[layer] * fracLayer;
                TopDUL += soilPhysical.DULmm[layer] * fracLayer;
                depthFromSurface += soilPhysical.Thickness[layer];
                if (depthFromSurface >= depthPAWC)
                    layer = nLayers;
            }
        }
             
        //Determine daily requirement for irrigation
        [EventSubscribe("StartOfDay")]
        private void OnStartOfDay(object sender, EventArgs e)
        {
            //Can we irrigate today?          
            SeasonIsOpen = isBetween(Clock.Today, StartDate, EndDate);
            if (!SeasonIsOpen)
                SeasonAppliedAmount = 0;

            //Is there a crop in the ground that needs irrigation?
            CropIsActive = false;
            if ((existingCrop != null) && (existingCrop.IsAlive))
                CropIsActive = true;
            //if ((existingCrop.Phenology.Stage >= 3.0) && (existingCrop.Phenology.Stage < 6.0))
          
            //Is the irrigator available?
            IrrigatorIsAvailable = false;
            DaysSinceIrrigation += 1;
            if (DaysSinceIrrigation >= returndays)
                IrrigatorIsAvailable = true;
          
            //Is the soil dry enough to require irrigation?
            SoilIsDry = false;
            double depthFromSurface = 0.0;
            double fracLayer = 0.0;
            TopSWC = 0.0;
            for (int layer = 0; layer < nLayers; layer++)
            //for (int layer = 0; depthFromSurface < depthPAWC + soilPhysical.Thickness[layer]; layer++)
            {
                fracLayer = Math.Min(1.0, (depthPAWC - depthFromSurface) / soilPhysical.Thickness[layer]);
                TopSWC += waterBalance.SWmm[layer] * fracLayer;
                depthFromSurface += soilPhysical.Thickness[layer];
                if (depthFromSurface >= depthPAWC)
                    layer = nLayers;
            }
            
            TopSWdeficit = TopSWC - TopDUL;
            if (Math.Max(0.0, -TopSWdeficit) >= (TopDUL - TopLL) * (100 - triggerDeficit) / 100)
                SoilIsDry = true;
                
            //Are all the conditions ratifying irrigation
            if (IrrigationIsAllowed && SeasonIsOpen && CropIsActive && IrrigatorIsAvailable && SoilIsDry)
            {
                //Lets bloody well irrigate then!!!!
                AmountToApply = TopDUL * targetDeficit / 100 - TopSWC;
                AmountToApply = Math.Max(0.0, Math.Min(AmountToApply, seasonsAllocation - SeasonAppliedAmount));
                AmountToApply = Math.Min(AmountToApply,maximumAmount);
                Irrigation.Apply(AmountToApply);
                DaysSinceIrrigation = 0;
                SeasonAppliedAmount += AmountToApply;
            }
        }
        
        ///Checks whether theDate is between iniDate and endDate (non-year specific)
        private bool isBetween(DateTime theDay, DateTime iniDate, DateTime endDate)
        {
            bool result = false;
            if (iniDate.DayOfYear < endDate.DayOfYear)
            {
                // period is within one year, ex: summer in the northern hemisphere
                if ((theDay.DayOfYear >= iniDate.DayOfYear) && (theDay.DayOfYear <= endDate.DayOfYear))
                    result = true;
            }
            else
            {
                // period goes over the end of the year, ex: summer in the southern hemisphere
                if ((theDay.DayOfYear >= iniDate.DayOfYear) || (theDay.DayOfYear <= endDate.DayOfYear))
                    result = true;
            }
            
            return result;
        }
    }
}
```
        Soil: Latitude=0; Longitude=0
          Physical
            Thickness  ParticleSizeClay  ParticleSizeSand  ParticleSizeSilt  Rocks  BD     AirDry  LL15   DUL    SAT   KS
            60         17.61             33.77             48.62             0      0.865  0.077   0.231  0.565  0.58  216
            110        17.61             33.77             48.62             0      0.865  0.077   0.231  0.565  0.58  216
            140        17.61             33.77             48.62             0      0.865  0.077   0.231  0.565  0.58  216
            240        17.61             33.77             48.62             0      0.865  0.077   0.231  0.565  0.58  216
            150        17.61             33.77             48.62             0      0.865  0.077   0.231  0.565  0.58  216
            SoilCrop AgPRyegrassSoil: LL=[0.231, 0.231, 0.231, 0.231, 0.231]; KL=[0.1, 0.1, 0.1, 0.1, 0]; XF=[1, 1, 1, 1, 0]
            SoilCrop AgPWhiteCloverSoil: LL=[0.231, 0.231, 0.231, 0, 0]; KL=[0.1, 0.1, 0.1, 0, 0]; XF=[1, 1, 1, 0, 0]
          Nutrient
          Organic: FOMCNRatio=40; CarbonUnits=Total
            Thickness  Carbon  SoilCNRatio  FBiom  FInert  FOM
            60         8.2     12.5         0.08   0.58    92.873
            110        5.5     12.5         0.02   0.7     57.963
            140        3.3     12.5         0.015  0.77    31.811
            240        1.7     12.5         0.01   0.9     11.373
            150        1.7     12.5         0.01   0.99    0
          Chemical: Thickness=[60, 110, 140, 240, 150]; PH=[6.5, 6.5, 6.5, 6.5, 6.5]; PHUnits=Water
          Water: Thickness=[60, 110, 140, 240, 150]; InitialValues=[0.565, 0.565, 0.565, 0.565, 0.565]; RelativeTo=LL15; FilledFromTop=false
          Swim3: Salb=0.13; CN2Bare=50; CNRed=20; CNCov=0.8; KDul=1; PSIDul=-100; VC=true; DTMin=0; DTMax=60; MaxWaterIncrement=5; SpaceWeightingFactor=0; SoluteSpaceWeightingFactor=1; Dis=0; Disp=1; A=2; DTHC=0.1; DTHP=2; Diagnostics=false
          Solute Cl: InitialValuesUnits=ppm; WaterTableConcentration=0; D0=0.05; DepthConstant=0; MaxDepthSoluteAccessible=0; RunoffEffectivenessAtMovingSolute=0; MaxEffectiveRunoff=0
            Thickness  InitialValues  Exco  FIP
            60         0              0     1
            110        0              0     1
            140        0              0     1
            240        0              0     1
            150        0              0     1
          LayerStructure: Thickness=[10, 20, 30, 40, 50, 50, 50, 50, 100, 100, 50, 50, 50, 50]
          SoilTemperature
          Solute NO3: InitialValuesUnits=ppm; WaterTableConcentration=0; D0=0.05; DepthConstant=0; MaxDepthSoluteAccessible=0; RunoffEffectivenessAtMovingSolute=0; MaxEffectiveRunoff=0
            Thickness  InitialValues  Exco  FIP
            60         6.503          0     1
            110        2.101          0     1
            140        2.101          0     1
            240        1.701          0     1
            150        1.701          0     1
          Solute NH4: InitialValuesUnits=ppm; WaterTableConcentration=0; D0=0.05; DepthConstant=0; MaxDepthSoluteAccessible=0; RunoffEffectivenessAtMovingSolute=0; MaxEffectiveRunoff=0
            Thickness  InitialValues  Exco  FIP
            60         0.599          1     1
            110        0.1            1     1
            140        0.1            1     1
            240        0.1            1     1
            150        0.1            1     1
          Solute Urea: InitialValuesUnits=kg/ha; WaterTableConcentration=0; D0=0.05; DepthConstant=0; MaxDepthSoluteAccessible=0; RunoffEffectivenessAtMovingSolute=0; MaxEffectiveRunoff=0
            Thickness  InitialValues  Exco  FIP
            60         0              0     1
            110        0              0     1
            140        0              0     1
            240        0              0     1
            150        0              0     1
        Irrigation
        Fertiliser
        SurfaceOrganicMatter: InitialResidueName=grass; InitialResidueType=grass; InitialResidueMass=20; InitialStandingFraction=0; InitialCPR=0; InitialCNR=17
        SimpleGrazing: GrazingRotationType=0; SimpleGrazingFrequencyString=end of month; SimpleMinGrazable=0; SimpleGrazingResidual=1200; FlexibleGrazePostDM=0; FractionDefoliatedNToSoil=[90]; FractionExcretedNToDung=[0.4]; CNRatioDung=0; DepthUrineIsAdded=150; FractionPopulationDecline=0; TramplingOn=false; MaximumPropLitterMovedToSoil=0.1; PastureConsumedAtMaximumRateOfLitterRemoval=1200
        PastureSpecies AGPRyegrass: doyGermination=275; daysEmergenceToAnthesis=120; daysAnthesisToMaturity=85; degreesDayForAnthesis=1100; degreesDayForMaturity=900; daysAnnualsFactor=45; InitialShootDM=2500; InitialRootDM=500; InitialRootDepth=350; initialDMFractionsGrasses=[0.15, 0.25, 0.25, 0.05, 0.05, 0.1, 0.1, 0.05, 0, 0, 0]; initialDMFractionsForbs=[0.2, 0.2, 0.15, 0.05, 0.1, 0.15, 0.1, 0.05, 0, 0, 0]; PhotosyntheticEfficiency=0.01; PhotosynthesisCurveFactor=0.8; FractionPAR=0.5; ReferenceCO2=380; CO2EffectScaleFactor=700; CO2EffectOffsetFactor=600; CO2EffectMinimum=0.7; CO2EffectExponent=2; ReproSeasonDurationCoeff=2; ReproSeasonShouldersLengthFactor=1; ReproSeasonOnsetDurationFactor=0.6; RelativeTurnoverEmerging=2; DetachmentDroughtCoefficient=3; DetachmentDroughtEffectMin=0.1; TurnoverStockFactor=0.01; TurnoverDefoliationEffectMin=0.025; MinimumGreenLeafProp=0.8; MinimumGreenRootProp=0.5
          initialDMFractionsLegumes=[0.16, 0.23, 0.22, 0.05, 0.03, 0.05, 0.05, 0.01, 0.04, 0.08, 0.08]
          LinearInterpolationFunction FVPDFunction
        PastureSpecies AGPWhiteClover: doyGermination=275; daysEmergenceToAnthesis=120; daysAnthesisToMaturity=85; degreesDayForAnthesis=1100; degreesDayForMaturity=900; daysAnnualsFactor=45; InitialShootDM=500; InitialRootDM=250; InitialRootDepth=300; initialDMFractionsGrasses=[0.15, 0.25, 0.25, 0.05, 0.05, 0.1, 0.1, 0.05, 0, 0, 0]; initialDMFractionsForbs=[0.2, 0.2, 0.15, 0.05, 0.1, 0.15, 0.1, 0.05, 0, 0, 0]; PhotosyntheticEfficiency=0.01; PhotosynthesisCurveFactor=0.8; FractionPAR=0.5; ReferenceCO2=380; CO2EffectScaleFactor=700; CO2EffectOffsetFactor=600; CO2EffectMinimum=0.7; CO2EffectExponent=2; ReproSeasonDurationCoeff=2; ReproSeasonShouldersLengthFactor=1; ReproSeasonOnsetDurationFactor=0.6; RelativeTurnoverEmerging=2; DetachmentDroughtCoefficient=3; DetachmentDroughtEffectMin=0.1; TurnoverStockFactor=0.01; TurnoverDefoliationEffectMin=0.025; MinimumGreenLeafProp=0.8; MinimumGreenRootProp=0.5
          initialDMFractionsLegumes=[0.16, 0.23, 0.22, 0.05, 0.03, 0.05, 0.05, 0.01, 0.04, 0.08, 0.08]
          LinearInterpolationFunction FVPDFunction
        Report: EventNames=[Clock].EndOfDay
          VariableNames:
            [SWIM3_SetLowerBC].Script.LowerBCType
            [Clock].Today as Date
            [Soil].Swim3.Drainage as Drainage
    Simulation HowToSetAWaterTableLowerBoundaryCondition
      Memo
        By default, if no action is taken, SWIM will use a unit gradient lower boundary condition (normal drainage from a soil) and this is what will be used in most simulations - but there are exceptions.

        The "potential" boundary condition is when there is a set soil water potential at the base of the simulated soil. The user must set the value of the potential for this boundary condition. That value is relative to the simulated soil depth.

        If the value is negative then water will be constantly 'pulled' out of the lower layer by a suction (i.e., drainage above that expected from gravity alone).

        More often with this boundary condition the value will be positive, meaning that there is a water table that is caused by external factors (i.e. not a perched water table caused by poor internal drainage) such as a regional water table. In these cases it is assumed that there is an infinite supply of water available to keep the soil water potential of the lower boundary at the user-prescribed value. To achieve this, water is continually added (or removed) from the soil to maintain the set potential.

        The value associated with the potential lower boundary condition is relative to the base of the simulated soil profile. If the simulated soil profile is 1000 mm deep and a potential of 250 mm is set for the lower boundary, then the water table will be 750 mm below the soil surface. If the soil profile was 1500 mm deep and the potential was still set at 250 mm then the water table would be at a depth of 1250 mm below the soil surface.

        The simulation below shows a simulation with a potential boundary condition set at 200 mm and a soil profile depth of 700 mm. You will see that the water table depth is 500 mm or so - there are fluctuations caused by rainfall etc. You will also see that drainage out of the base of the soil profile can be either positive (downward) or negative (upward) with the latter being when the regional water table is replenishing water into the soil profile.
      Weather
        FileName=C:\Users\RIC394\source\repos\ric394\ApsimX\Examples\WeatherFiles\lincoln.met
      Clock: Start=2000-01-01; End=2005-01-31
      Summary summaryfile
      SoilArbitrator
      MicroClimate: a_interception=0; b_interception=0; c_interception=0; d_interception=0; SoilHeatFluxFraction=0; MinimumHeightDiffForNewLayer=0; NightInterceptionFraction=0; ReferenceHeight=2
      Forages: same as Tutorial.HowToSetASeepageLowerBoundaryCondition.Forages
      Zone paddock: Area=1; Slope=0; AspectAngle=0; Altitude=50
        Manager SWIM3_SetLowerBC
          LowerBCType = potential
          LowerBCValue = 200
          script: same as in Tutorial.HowToSetASeepageLowerBoundaryCondition.paddock.SWIM3_SetLowerBC
        Manager AutomaticIrrigation: same as Tutorial.HowToSetASeepageLowerBoundaryCondition.paddock.AutomaticIrrigation
        Irrigation
        Fertiliser
        SurfaceOrganicMatter: InitialResidueName=grass; InitialResidueType=grass; InitialResidueMass=20; InitialStandingFraction=0; InitialCPR=0; InitialCNR=17
        Soil: same as Tutorial.HowToSetASeepageLowerBoundaryCondition.paddock.Soil
        SimpleGrazing: same as Tutorial.HowToSetASeepageLowerBoundaryCondition.paddock.SimpleGrazing
        PastureSpecies AGPRyegrass: same as Tutorial.HowToSetASeepageLowerBoundaryCondition.paddock.AGPRyegrass
        PastureSpecies AGPWhiteClover: same as Tutorial.HowToSetASeepageLowerBoundaryCondition.paddock.AGPWhiteClover
        Report: EventNames=[Clock].EndOfDay
          VariableNames:
            [Clock].Today as Date
            [Soil].Swim3.Drainage as Drainage
            [Soil].Swim3.WaterTable as WaterTableDepth
    Simulation HowToCheckMyWaterBalance
      Memo
        SWIM uses a numerical solution when calculating water and solute movement and such solutions can generate losses of mass balance of water that accumulate over time. Within any one simulation day, SWIM will check mass balance but it will not check if those errors accumulate over extended periods of time. It also cannot check if there are errors, external to SWIM, that are creating or losing mass of water. The Manager component “CalculateRollingWaterBalance” was created to do this task.

        CalculateRollingWaterBalance automatically checks for additions (e.g., rainfall, irrigation) and removals (e.g., plant water uptake, runoff) and calculates a whole-of-zone water balance. The component has several outputs that may be useful but the most useful one is WaterBalanceCumulative which tracks any gain/loss of water continuously over the simulation.

        It is useful to look at both the daily water balance (WaterBalanceToday) and the cumulative version (WaterBalanceCumulative).
      Weather
        FileName=C:\Users\RIC394\source\repos\ric394\ApsimX\Tests\Validation\SWIM\lincoln.met
      Clock: Start=2000-01-01; End=2005-01-31
      Summary summaryfile
      SoilArbitrator
      MicroClimate: a_interception=0; b_interception=0; c_interception=0; d_interception=0; SoilHeatFluxFraction=0; MinimumHeightDiffForNewLayer=0; NightInterceptionFraction=0; ReferenceHeight=2
      Forages: same as Tutorial.HowToSetASeepageLowerBoundaryCondition.Forages
      Zone paddock: Area=1; Slope=0; AspectAngle=0; Altitude=50
        Manager CalculateRollingWaterBalance
          WBTolerance = 0.1
```csharp
// This script calculates a *WaterBalance* term (output) that adds together the water balance
// water entering the system (e.g. rain, irrigation) and subtracts the water
// leaving the system (e.g. runoff, drainage, evaporation, plant water uptake). If mass balance
// is maintained, the *WaterBalance* variable should always be zero.   




using Models.Climate;
using APSIM.Shared.Utilities;
using Models.Soils.Nutrients;
using Models.Soils;
using Models.PMF;
using Models.Core;
using System.Xml.Serialization;
using System;
using Models.AgPasture;
using Models.Interfaces;
using System.Linq;

namespace Models
{
    [Serializable] 
    [System.Xml.Serialization.XmlInclude(typeof(Model))]
    public class Script : Model
    {
        [Link] Clock clock;
        [Link] ISummary summary;
        [Link] IWeather weather;
        [Link] Irrigation irrigation;
        [Link] private ISoilWater waterBalance;
        [Link] private IPlant[] plants;

  
  		[Separator("This manager checks that water in the simulation balances - that all inputs are accounted for as storage or losses. If the water balance exceeds (high or low) the tolerance then the simulation is crashed.")]
  		
  		[Description("What water mass balance error is tolerable in the cumulative water balance? (mm /year) (suggest substantially < 1 mm /year)")] public double WBTolerance { get; set; }
  		
  		
        public double WaterBalanceCumulative  { get; set; }
        public double WaterBalanceToday  { get; set; }

        public double SoilWaterAtInitialisation  { get; set; }
        public double SoilWaterYesterday  { get; set; }
		public double SoilWaterNow  { get; set; }

		public double PlantWaterUptake { get; set; }

        public double WaterAddedToday  { get; set; }
        public double WaterRemovedToday  { get; set; }
        public double WaterAddedCumulative  { get; set; }
        public double WaterRemovedCumulative  { get; set; }
        
        public double WBCheck { get; set; }
        

        [EventSubscribe("DoDailyInitialisation")]
        private void DoDailyInitialisation(object sender, EventArgs e)
        {
        	if (clock.Today == clock.StartDate) 
        	// capture the water in and on the soil as a starting point
        	// doing this here as need the models to have intialised first
        	{
	        	SoilWaterAtInitialisation = waterBalance.Pond;
    	    	for (int i = 0; i < waterBalance.SWmm.Length; i++)
        			SoilWaterAtInitialisation += waterBalance.SWmm[i];

        		SoilWaterYesterday = SoilWaterAtInitialisation;		
        		WaterAddedCumulative = 0.0;
        		WaterRemovedCumulative = 0.0;
        		SoilWaterNow = 0.0;
        	}
        	else
        	{
        		SoilWaterYesterday = SoilWaterNow;		// SoilWaterNow holds the value calculated at reporting yesterday
        		WaterAddedToday = 0.0;
        		WaterRemovedToday = 0.0;
        	}
		}

        [EventSubscribe("DoReportCalculations")]
        private void DoReportCalculations(object sender, EventArgs e)
        {
       	// All the WaterBalance variables should be zero. A positive value is a generation of water.
        	SoilWaterNow = waterBalance.Pond;
        	for (int i = 0; i < waterBalance.SWmm.Length; i++)
        		SoilWaterNow += waterBalance.SWmm[i]; // so all the water stored in or on the soil

        	WaterAddedToday = weather.Rain + irrigation.IrrigationApplied;   // Can there be runon? Probably not but this will throw an error if that ever happens
        	WaterAddedCumulative+= WaterAddedToday;

        	WaterRemovedToday = waterBalance.Drainage + waterBalance.Es + waterBalance.Runoff + waterBalance.SubsurfaceDrain;
        	PlantWaterUptake = 0.0;
        	foreach (var plant in plants)
        	{
        		if (plant.WaterUptake != null)
        			PlantWaterUptake += plant.WaterUptake.Sum();
        	}

        	WaterRemovedToday += PlantWaterUptake;

        	WaterRemovedCumulative += WaterRemovedToday;

        	WaterBalanceToday = WaterAddedToday - WaterRemovedToday - (SoilWaterNow - SoilWaterYesterday);
        	WaterBalanceCumulative = WaterAddedCumulative - WaterRemovedCumulative - (SoilWaterNow - SoilWaterAtInitialisation);

        	// need to add a warning value and a crash value and make a crash
        	double simTimeYears = (clock.Today - clock.StartDate).Days/365.25;
        	if (simTimeYears > 0.1)
        	{
        		WBCheck = WaterBalanceCumulative * simTimeYears;
        		if (WBCheck > WBTolerance * simTimeYears)
        			throw new Exception("The error in the water balance, " + WaterBalanceCumulative + ", exceeded the specified tolerance of " + WBTolerance * simTimeYears + ". There is likely a problem with SWIM or SoilWater.");
        	}
		}
    }
}
```
        Manager SWIM3_SetLowerBC
          LowerBCType = potential
          LowerBCValue = -500
          script: same as in Tutorial.HowToSetASeepageLowerBoundaryCondition.paddock.SWIM3_SetLowerBC
        Manager AutomaticIrrigation: same as Tutorial.HowToSetASeepageLowerBoundaryCondition.paddock.AutomaticIrrigation
        Soil: same as Tutorial.HowToSetASeepageLowerBoundaryCondition.paddock.Soil
        Irrigation
        Fertiliser
        SurfaceOrganicMatter: InitialResidueName=grass; InitialResidueType=grass; InitialResidueMass=20; InitialStandingFraction=0; InitialCPR=0; InitialCNR=17
        SimpleGrazing: same as Tutorial.HowToSetASeepageLowerBoundaryCondition.paddock.SimpleGrazing
        PastureSpecies AGPRyegrass: same as Tutorial.HowToSetASeepageLowerBoundaryCondition.paddock.AGPRyegrass
        PastureSpecies AGPWhiteClover: same as Tutorial.HowToSetASeepageLowerBoundaryCondition.paddock.AGPWhiteClover
        Report: EventNames=[Clock].EndOfDay
          VariableNames:
            [Clock].Today as Date
            [CalculateRollingWaterBalance].Script.WaterBalanceCumulative as WaterBalanceCumulative
            [CalculateRollingWaterBalance].Script.WaterBalanceToday as WaterBalanceToday
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