Simulations: Version=57
  Memo Introduction
    # Introduction

    Sensitivity analysis is an important part of assessing model behaviour and reliability. Sensitivity analysis looks at how the output of a model (i.e. simulation) varies, as the inputs are changed. The term _input_ here refers to data that is fed into the simulation (primarily the `met` file), model parameters (e.g. saturated water content), and initial constants (e.g. the mass of initial surface residue). Sensitivity analysis can be used to rank inputs according to their influence on output variability, or screen out inputs which have little or no influence on the output. The results of a sensitivity analysis can also be used to justify the choice of input values, or to calibrate the model. The importance of a robust sensitivity analysis is further discussed in [Saltelli2010].

    Many different sensitivity analysis methods exist. [Pianosi2016] provide a good high-level overview of various method types.  Most methods follow the same basic algorithm:

    1. Calculate the output for a range of input values.
    2. Compare output variation relative to input variation.

    The Morris method ([Morris1991]) allows the user to identify influential and non-influential numeric inputs. It is useful for screening out inputs that have a negligible contribution to output variability, regardless of the input value. Such inputs can be set to a constant value and excluded from more computationally intensive sensitivity analyses. It is also useful for identifying inputs that have a large contribution to output variability. Finally, the Morris method will reveal whether non-linear relationships or interaction effects are present (although it cannot be used to distinguish between the two).

    The Morris method cannot be used to assign a proportion of output variability to each input. Variance-based methods are suitable for this (e.g. the Sobol method). The Morris method is also not suitable for use with categorical inputs or _composite_ inputs. A composite input here refers to a collection of values that are typically not changed independently (e.g. a whole soil node, or `met` file). A factorial analysis of variance (ANOVA) allows quantitative analysis of categorical and composite inputs. It is however possible to run multiple Morris analyses (e.g. one for each soil type or `met` file), and qualitatively assess input effects (e.g. in different soils or climates).

    This example demonstrates the use of the Morris method in the context of modelling nitrogen leaching from a cow urine patch. The simulation is run for a winter-deposited urine patch in Ruakura. Understanding the factors that affect nitrogen leaching may help reduce its effects, while maintaining milk production. First, the Morris method is explained in more detail, and some potential pitfalls are highlighted. A range of results is then presented, which show the type of insight that can be gained from a Morris analysis.

    <br/>
  DataStore
  Memo MorrisMethodSetup
    # Morris Method Setup

    <br/>

    ## Base Simulation

    The Morris method is run from a `Morris` node. It can be found in `Models`, and should be added at the same level as the `DataStore`. The `Morris` node requires a base simulation. Expand the Morris node, `MorrisMethodExample`, to reveal the base simulation for this example (`UrinePatchSimulation`). The Morris method does not impose restrictions on the contents of the simulation.

    The Morris method does require a specific reporting format however. Have a look at the `Report` node (expand the base simulation node and the `Field` node). Note that the report node must be named `Report`. The simulation report must also contain the year variable, `[Clock].Today.Year`, as it is expected by the `DataStore` functionality. The example report contains two other variables:

    * `[AddUrinePatches].Script.DepositionYear as DepositionYear`
    * `[DoReportingSensit].Script.LeachN as LeachN`

    `LeachN` (nitrogen leached) is the reporting variable we are interested in analysing. In the context of sensitivity analysis, it is the _output_ of the model. Additional outputs can be added, without increasing computational cost. Outputs must also be numeric.

    <hr>
    **Tip**: Running each simulation is by far the most computationally expensive part of the sensitivity analysis. It is better to err on the side of caution and report all outputs that may be of interest!
    <hr>

    If, like here, an output is reported several times, the Morris node will analyse each value separately. As you will see later, this allows you to get an idea of temporal variability in the sensitivity estimates.

    If you select the `Clock` node, you will see the length of this simulation is 11 years (1972-1983). The reporting frequency for this example is set in a manager script (`DoReportingSensit`, found in the `Folder` node). `LeachN` is reported every two years, giving a total of five values for `LeachN`. These correspond to urine depositions in 1972, 1974, 1976, 1978, and 1980. You can view the urine deposition parameters in the manager script `AddUrinePatches`. Note that the reporting should not happen more frequently than annually (at present `[Clock].Today.Year` is used to group output into separate analyses). The reporting frequency should be set based on domain knowledge, and may correspond to a harvest year to investigate annual variability. `DepositionYear` is reported to allow us to plot the nitrogen leached for each deposition year, but is not needed for the Morris analysis.

    The finished base simulation is copied into the Morris node. The original simulation may be deleted.

    <hr>
    **Tip**: Multiple Morris analyses can be run at once, by adding additional Morris nodes. The name of the base simulation in each Morris node must be unique however.
    <hr>

    <br/>

    ## Morris Node

    Now select the Morris node (`MorrisMethodExample`). Here you will find the various fields that need to be populated prior to a Morris analysis. Look at the bottom part of the user interface panel first. Here you add, as a separate row, each input which is to be analysed. In this example we are interested in the sensitivity of nitrogen leaching to soil organic carbon (`SOC`), nitrogen load within the urine patch (`Load`), and soil drainage (`DUL`). Each input requires the following:

    * `Name`: Used to identify the input in the analysis, but does not affect analysis results.
    * `Path`: The location of the input within the simulation.
    * `UpperBound, LowerBound`: The range over which the input will be sampled in the analysis.

    The location of the input (`Path`) can be found with the help of IntelliSense. Try adding another copy of the input `SOC`. Note: all paths should start with the `Field` node. Entering the full stop character will bring up the IntelliSense dropdown box. The desired variable is part of an array (`OC`), so you need to finish the path with an index. Make sure to delete one of the `SOC` copies before running the analysis.

    <hr>
    **Advanced**: If your simulation contains a manager script, inputs (i.e. parameters and initial constants) in the script can also be accessed. Take a closer look at the `Load` input to find out how this is done.
    <hr>

    The fields `UpperBound` and `LowerBound` define the range over which the corresponding input will be sampled. This range is often considered to be the most important piece of information used to set up the analysis. In most cases, adjusting the input range will affect the results of the sensitivity analysis. Note this applies to not only the Morris method, but sensitivity analysis in general. Unfortunately there is no universal rule for selecting the range. The range should be selected based on domain knowledge, and should cover all values that you might reasonably expect to be model inputs. See Section 4 of [Pianosi2016] for more information on defining the input range.

    This may seem obvious, but the analysis will not identify important inputs if they are not explicitly included in the analysis!

    At this point we have defined the input space:

    ![Sample Grid](MorrisGrid1.png)

    Now look at the top part of the user interface panel. Here are located a few more analysis settings:

    * `Number of intervals`: The number of intervals each input range is split into. In this implementation this is constrained to the same value for all inputs. The input sampling space is now a 3-dimensional grid, where each possible input value is called a _level._ The number of levels is the number of intervals + 1. The levels should adequately sample the input space - an input that is suspected to have a non-linear relationship with the output warrants a greater number of levels (and hence a greater number of intervals). The resulting grid:

    ![Sample Grid](MorrisGrid2.png)

    * `Number of paths`: Note this does not refer to the location path of a variable, such as the one you entered above! It is the _number of samples_ in the Morris analysis. From here on, we will use the term path exclusively in a sampling context. A greater number of paths will give more reliable results, but increase the analysis run time. Now imagine manually selecting a sample point:

    ![Sample Grid](MorrisGrid3.png)

    * `Jump`: This is the magnitude of the change in each input, used to calculate sensitivity. It is an integer specifying the number of levels that each input will be changed by, from the base input value (red dot). The recommendation made by Morris is to set `Jump` to half the number of intervals. The jump is represented by an arrow in the grids below.

    <hr>
    **Tip**: The number of _simulations_ that will run is *n*(*m* + 1), where *n* is the number of paths, and *m* the number of inputs being analysed. You can use this information to get an estimate of the analysis run time.
    <hr>

    <hr>
    **Advanced**: In this implementation of the Morris method, the input space is in fact scaled to a unit hypercube. This ensures sampling is not biased towards larger input values. Sampling is random with replacement, in this implementation of the method.
    <hr>

    <br>

    ## The Morris Method Algorithm

    At this stage we have set up the analysis. Run APSIM from the `Simulations` node to start the analysis, if you have not done so already. It may take a couple of minutes to finish.

    The Morris method will randomly select _n_ points from the sampling grid. For each point (i.e. combination of input values):

    1. The model output is evaluated.
    2. For each of the *m* inputs:

        * The input value is increased or decreased by the number of levels specified in `Jump`. This selects a new point in the grid. Look at the grids below for an illustration, keeping in mind `Jump` is set to 5 for this example.
        * The output is re-evaluated for this new point.
        * The input value is changed back to the initial value.
        * An _elementary effect, EE_ (for the *i*th variable, at point *x* in the grid), is calculated by dividing the change in the output by the change in the input:

    ![Elementary Effects Equation](ElementaryEffectEquation.png)

    Jump illustrations:

    ![Sample Grid](MorrisGrid4.png)

    Note that the point selected after a jump is always inside the sampling grid. The requirement to stay within the sampling grid dictates whether the jump is an increase or a decrease. Now we are in a good position to understand what the term _path_ really refers to. It is a sampling construct that encompasses:

    * The sampled grid point (red dot).
    * The corresponding set of _m_ jumps (arrows).
    * The set of _m_ new points, derived using jumps (blue, yellow, and green dots).

    At this stage of the algorithm, all of the simulations have been run. For each of the _m_ inputs we have _n_ elementary effects. Each elementary effect is only a _local_ measure of sensitivity however. This means it is a measure of sensitivity at one particular point in the input space. The sensitivity will usually change at different points in the input space however! This problem is solved by aggregating the _n_ elementary effects for each input into an average (*mu star*) and a standard deviation (*sigma*). The average *mu star* is the mean of the *absolute values* of the elementary effects, as positive and negative effects may cancel out otherwise. It is a _global_ measure of sensitivity, meaning it is derived from points that are spread all over the input space.

    <hr>
    **Advanced**: The Morris node uses the factorial functionality in APSIM, but the analysis design itself is obtained using the R programming language. You can obtain the R script and some intermediate results in your temporary directory, while APSIM is still open. For more information you can also look at the documentation of the R package `sensitivity` (the implemented method is named `morris`).
    <hr>

    <br/>
  Morris MorrisMethodExample: NumPaths=25; NumIntervals=10; Jump=5; TableName=Report; AggregationVariableName=Clock.Today.Year
    Parameters:
      {Name=SOC, Path=Field.Soil.SoilOrganicMatter.OC[1], LowerBound=1, UpperBound=10}
      {Name=Load, Path=Field.Folder.AddUrinePatches.Script.DepositionLoad, LowerBound=100, UpperBound=1000}
      {Name=DUL, Path=Field.Soil.Water.DUL[1], LowerBound=0.2, UpperBound=0.4}
    Simulation UrinePatchSimulation
      Clock: StartDate=1972-01-01; EndDate=1983-12-31
      Weather: FileName=%root%\Examples\WeatherFiles\VCS_Ruakura.met
      Summary
      SoilArbitrator
      Zone Field: Area=1; Slope=0
        Folder
          Manager CutRotation
            ControlDefoliationAllowed = True
            CutRotationStartDate = 1900-01-01
            CutRotationEndDate = 2100-12-31
            IntervalType = FixedInterval
            CutInterval = 21
            DurationOfCut = 1
            RemoveAmountType = ResidualDM
            AmountGiven = 1500
            DMRemoveType = RemoveAll
            fractionDM2Remove = 0
            FractionN2Remove = 1
            ReturnType = AsDungUrine
            NDungType = DefineProportion
            ProportionN2Dung = 0.4
            CNRatioDung = 0
            UrineDepth = 250
```csharp
// Defoliates AgPasture on a regular rotation or one-off via a schedule
// currenty defoliates the amount specified by spreading evenly over the specified period

using System;
using System.Xml.Serialization;
using Models.Core;
using Models.PMF;
using Models.Soils;
using Models.Soils.Nutrients;
using APSIM.Shared.Utilities;
using Models.Interfaces;

namespace Models
{
    [Serializable]
    public class Script : Model
    {
        // - Links to APSIM models
        [Link] Zone zone;
        [Link] Clock Clock;
        [Link] Fertiliser fertiliser;
        [ScopedLinkByName] ISolute urea;
        [Link] Soil mySoil;
        [Link] ISummary summary = null;
        [Link] AgPasture.Sward Pasture;
        
        // - Parameters for this manager
        [Separator("Rules for controlling pasture defoliation and residue management")]

        [Description("Allow this manager to control defoliation? (untick if using Operations for defoliation)")] public bool ControlDefoliationAllowed { get; set; }
        [Description("Date to begin the rotation: ")] public DateTime CutRotationStartDate { get; set; }
        [Description("Date to finish the rotation: ")] public DateTime CutRotationEndDate { get; set; }
        [Description("How the interval is defined? ")] public rotationIntervalTypes IntervalType { get; set; }
        [Description("Rotation interval (days): ")] public int CutInterval { get; set; }
        [Description("Duration of each event (days): ")] public int DurationOfCut { get; set; }
        [Description("What amount is being defined? ")] public removeAmountTypes RemoveAmountType { get; set; }
        [Description("Amount to use (kg/ha): ")] public double AmountGiven { get; set; }

        [Separator("Management of harvested material and residue")] 
        [Description("How much of harvested DM (and C) is removed from the simulation? ")] public removeDMTypes DMRemoveType { get; set; }
        [Description("Fraction of harvested material to remove, if choosing UseTheFractionSetBelow (0-1):")] public double fractionDM2Remove  { get; set; }
        [Description("Fraction of harvested N that is removed from the simulation (0-1):")] public double FractionN2Remove { get; set; }
        [Description("How the non-removed material is returned to the soil? ")] public returnTypes ReturnType { get; set; }

        [Separator("Parameters used when returning material as dung and urine")]
        [Description("How should the partitioning of N to dung and urine be defined? ")] public dungNContentTypes NDungType { get; set; }
        [Description("Proportion of N returned in dung (0-1): ")] public double ProportionN2Dung { get; set; }
        [Description("The C:N of dung (typically around 20): ")] public double CNRatioDung { get; set; }
        [Description("Depth in the soil to which urine is applied (mm): ")] public double UrineDepth { get; set; }

        // - Outputs from this manager
        [XmlIgnore][Units("g/m2")]// Description: Pasture DM defoliated today
        public double DefoliatedWt { get; set; }
        [XmlIgnore][Units("g/m2")]// Description: Pasture N defoliate today
        public double DefoliatedN { get; set; }
        [XmlIgnore][Units("g/m2")]// Description: Pasture DM harvested today
        public double HarvestedWt { get; set; }
        [XmlIgnore][Units("g/m2")]// Description: Pasture N harvested today
        public double HarvestedN { get; set; }
        [XmlIgnore][Units("g/m2")]// Description: Pasture DM removed from the field
        public double RemovedWt { get; set; }
        [XmlIgnore][Units("g/m2")]// Description: Pasture N removed from the field
        public double RemovedN { get; set; }
        [XmlIgnore][Units("g/m2")]// Description: Residue DM returned to the field
        public double ReturnedWt { get; set; }
        [XmlIgnore][Units("g/m2")]// Description: Residue N returned to the field
        public double ReturnedN { get; set; }
        [XmlIgnore][Units("g/m2")]// Description: Harvested N returned as dung (SurfaceOM)
        public double NReturnedInDung { get; set; }
        [XmlIgnore][Units("g/m2")]// Description: Harvested N returned as urine (urea)
        public double NReturnedInUrine { get; set; }
        [XmlIgnore][Units("day")]// Description: Number of days after last defoliation
        public int DaysAfterCut { get; set; }
        [XmlIgnore][Units("g/m2")]// Description: Total standing DM (Leaf + Stem/Sheath) before cut
        public double PreHarvestDM { get; set; }
        [XmlIgnore][Units("g/m2")]// Description: Total standing DM (Leaf + Stem/Sheath) after cut
        public double PostHarvestDM { get; set; }
        [XmlIgnore][Units("")]// auxiliary flag for defoliation
        public bool aCutHasHappened { get; set; }

        [XmlIgnore][Units("")] public bool HarvestedToday { get; set; } // auxiliary flag for defoliation


        // - Internal variables
        // number of days for each defoliation event
        private int cuttingDuration = 0;
        // counter for day within each defoliation
        private int daysCutting = 0;
        // total existing DM harvestable
        private double existingDM;
        // total herbage to remove in g/m2 per day
        private double herbageToRemove;
        // type of DM amount (ResidualDM or DMToRemove)
        private string amountType;
        // fraction of urine that is applied to each layer
        private double[] fractionUrine;
        // number of layers in the soil
        private int nLayers;

        // - Event to add residue or dung to surface OM
        public event BiomassRemovedDelegate BiomassRemoved;

        [EventSubscribe("StartOfSimulation")]
        private void OnStartOfSimulation(object sender, EventArgs e)
        {
            // reset variables
            DaysAfterCut = 0;
            resetVariables();
            cuttingDuration = DurationOfCut;
            HarvestedToday = false;
            
            // get the type of amount given
            if (RemoveAmountType == removeAmountTypes.ResidualDM)
                amountType = "SetResidueAmount";
            else
                amountType = "SetRemoveAmount";

            // make sure that rotation start when startDate < simulationStartDay
            if ((Clock.Today > CutRotationStartDate) && (Clock.Today < CutRotationEndDate))
                CutRotationStartDate = Clock.Today;

            // set the fraction of urine for each layer
            nLayers = mySoil.Thickness.Length;
            fractionUrine = new double[nLayers];
            double soilDepth = 0.0;
            double distFactor = 1.5;
            if (ReturnType == returnTypes.AsDungUrine)
            {
                double atZ0;
                double atZ1;
                double totalProp = UrineDepth * Math.Pow(1.0, distFactor) / (distFactor + 1.0);
                
                atZ1 = (UrineDepth - soilDepth) * Math.Pow(1.0 - soilDepth / UrineDepth, distFactor) / (distFactor + 1.0);
                for (int z = 0; z < nLayers; z++)
                {
                    atZ0 = atZ1;
                    soilDepth += mySoil.Thickness[z];
                    atZ1 = (UrineDepth - soilDepth) * Math.Pow(1.0 - soilDepth / UrineDepth, distFactor) / (distFactor + 1);
                    if (1.0 - (soilDepth / UrineDepth) < 0.0)
                        atZ1 = 0;
                    fractionUrine[z] = (atZ0 - atZ1) / totalProp;
                }
            }

            summary.WriteMessage(this, "Cut rotation initialised. Management valid between " + CutRotationStartDate.ToShortDateString() + " and " + CutRotationEndDate.ToShortDateString());
            summary.WriteMessage(this, "   manager will remove biomass every " + CutInterval + " days.");
            if (amountType == "SetResidueAmount")
                summary.WriteMessage(this, "   removing all biomass down to a residue of " + AmountGiven.ToString("#0.0") + " kg/ha.");
            else
                summary.WriteMessage(this, "   removing " + AmountGiven.ToString("#0.0") + " kg/ha in every event.");
        }
        
        [EventSubscribe("DoManagement")]
        private void OnDoManagement(object sender, EventArgs e)
        {
            // Check whether defoliation is allowed at all
            HarvestedToday = false;
            if (ControlDefoliationAllowed)
            {
                if (Clock.Today == CutRotationStartDate)
                    DaysAfterCut = CutInterval;

                // Check whether we can defoliate
                if ((Clock.Today >= CutRotationStartDate) && (Clock.Today <= CutRotationEndDate))
                {
                    // Check whether we should start a defoliation
                    if ((Pasture.IsAlive) && (DaysAfterCut >= (CutInterval - 1)))
                    {
                        StartDefoliation(AmountGiven, amountType, DurationOfCut);
                    }
                }
            }
            //// Note: Only the code above should be limited by 'ControlDefoliationAllowed'. So the rest of the code
            ////  can be used by being called from another manager or a schedulle thingy

            // Check whether we need to continue cutting
            if ((daysCutting > 0) && (daysCutting < cuttingDuration))
            {
                // reset outputs
                resetVariables();

                // remove biomass and return residue
                removeDM(herbageToRemove);
                if (ReturnType == returnTypes.AsResidue)
                    returnResidues();
                else
                    returnExcreta();
                daysCutting += 1;
                if (daysCutting == cuttingDuration)
                    PostHarvestDM = Pasture.StandingHerbageWt;
            }

            // reset outputs
            if (daysCutting < 0)
            {
                resetVariables();
                daysCutting = 0;
            }
        }

        [EventSubscribe("DoManagementCalculations")]
        private void OnDoManagementCalculations(object sender, EventArgs e)
        {
            // Check whether a cutting has finished
            if (daysCutting == cuttingDuration)
            {
                aCutHasHappened = true;
                daysCutting = -1;
            }

            // Increase the counter for days after cutting
            if (aCutHasHappened && (daysCutting == 0))
                DaysAfterCut += 1;
        }

        // Resets the values of all outputs
        private void resetVariables()
        {
            DefoliatedWt = 0.0;
            DefoliatedN = 0.0;
            HarvestedWt = 0.0;
            HarvestedN = 0.0;
            RemovedWt = 0.0;
            RemovedN = 0.0;
            ReturnedWt = 0.0;
            ReturnedN = 0.0;
            NReturnedInDung = 0.0;
            NReturnedInUrine = 0.0;
        }

        // Description: Perform the basic calculations for defoliation
        public void StartDefoliation(double amountDM, string amountType, int duration)
        {
            // Get the existing plant amount
            PreHarvestDM = Pasture.StandingHerbageWt;
            existingDM = Pasture.HarvestableWt;
            HarvestedToday = true;
            
            // Check the amount to remove and print some info
            if ((amountType == "SetRemoveAmount") && (existingDM >= amountDM / duration))
            {
                summary.WriteMessage(this, "   Defoliating " + (amountDM).ToString("#0.0") + "kg/ha over " + duration + " days");
                herbageToRemove = amountDM / duration;
            }
            else if ((amountType == "SetResidueAmount") && (existingDM >= amountDM))
            {
                summary.WriteMessage(this, "   Defoliating down to approximately " + (amountDM).ToString("#0.0") + "kg/ha over " + duration + " days");
                herbageToRemove = (PreHarvestDM - amountDM) / duration;
            }
            else
            {
                summary.WriteMessage(this, "   Defoliation will not happend because there is not enough plant material");
                if (IntervalType == rotationIntervalTypes.FixedInterval)
                    DaysAfterCut = -duration;
                return;
            }

            cuttingDuration = duration;
            // Preform first defoliation
            removeDM(herbageToRemove);
            if (ReturnType == returnTypes.AsResidue)
                returnResidues();
            else
                returnExcreta();
            daysCutting = 1;
            DaysAfterCut = 0;
            if (daysCutting == cuttingDuration)
                PostHarvestDM = Pasture.StandingHerbageWt;
        }

        // Do the DM removal
        private void removeDM(double removeAmount)
        {
            Pasture.Graze(amount: removeAmount, type: "SetRemoveAmount");
            
            // get total harvested
            DefoliatedWt = Pasture.HarvestedWt;
            DefoliatedN = Pasture.HarvestedN;
            HarvestedWt = DefoliatedWt;
            HarvestedN = DefoliatedN;

            // get amounts actually removed from field and that to be returned (dung/urine)
            if (DMRemoveType == removeDMTypes.RemoveAll)
                fractionDM2Remove = 1.0;
            else if (DMRemoveType == removeDMTypes.RemoveNone)
                fractionDM2Remove = 0.0;
            else
                fractionDM2Remove = Pasture.HarvestedDigestibility; //UseTheFractionSetBelow

            RemovedWt = HarvestedWt * fractionDM2Remove;
            RemovedN = HarvestedN * FractionN2Remove;
            ReturnedWt = HarvestedWt - RemovedWt;
            ReturnedN = HarvestedN - RemovedN;
            
            if (ReturnType == returnTypes.AsDungUrine)
            {
                if (NDungType == dungNContentTypes.DefineProportion)
                    NReturnedInDung = ReturnedN * ProportionN2Dung;
                else
                    NReturnedInDung = Math.Min(ReturnedN, ReturnedWt * 0.4 / CNRatioDung);
                NReturnedInUrine = ReturnedN - NReturnedInDung;
            }
            else
            {
                NReturnedInDung = 0.0;
                NReturnedInUrine = 0.0;
            }
        }

        // Return dung and urine
        private void returnExcreta()
        {
            if ((ReturnedWt > 0.0) || (NReturnedInDung > 0.0))
            {
                PMF.BiomassRemovedType BiomassDung = new PMF.BiomassRemovedType();
                string[] type = new string[] { "RuminantDung_PastureFed" };
                float[] dltdm = new float[] { (Single)ReturnedWt };
                float[] dltn = new float[] { (Single)NReturnedInDung };
                float[] dltp = new float[] { 0 };
                float[] fraction = new float[] { 1 };     // fraction is always 1.0 here

                BiomassDung.crop_type = "RuminantDung_PastureFed";
                BiomassDung.dm_type = type;
                BiomassDung.dlt_crop_dm = dltdm;
                BiomassDung.dlt_dm_n = dltn;
                BiomassDung.dlt_dm_p = dltp;
                BiomassDung.fraction_to_residue = fraction;
                BiomassRemoved.Invoke(BiomassDung);
            }

            if (NReturnedInUrine > 0.0)
            {
                double[] myUrineDeposition = new double[nLayers];
                for (int z = 0; z < nLayers; z++)
                    myUrineDeposition[z] = NReturnedInUrine * fractionUrine[z];

                urea.AddKgHaDelta(SoluteSetterType.Fertiliser, myUrineDeposition);
            }
        }

        // Return pasture residues
        private void returnResidues()
        {
            if ((ReturnedWt > 0.0) || (ReturnedN > 0.0))
            {
                PMF.BiomassRemovedType BiomassDung = new PMF.BiomassRemovedType();
                string[] type = new string[] { "Grass" };
                float[] dltdm = new float[] { (Single)ReturnedWt };
                float[] dltn = new float[] { (Single)ReturnedN };
                float[] dltp = new float[] { 0 };
                float[] fraction = new float[] { 1 };     // fraction is always 1.0 here

                BiomassDung.crop_type = "Grass";
                BiomassDung.dm_type = type;
                BiomassDung.dlt_crop_dm = dltdm;
                BiomassDung.dlt_dm_n = dltn;
                BiomassDung.dlt_dm_p = dltp;
                BiomassDung.fraction_to_residue = fraction;
                BiomassRemoved.Invoke(BiomassDung);
            }
        }
        
        // Auxiliary bits and pieces  - - - - - - - - - - - - - - - - - - - - - - - - - - - - - - - - -

        public enum removeAmountTypes
        {
            /// <summary>Setting DM amount to remove</summary>
            DMToRemove,
            /// <summary>Setting residual DM amount</summary>
            ResidualDM
        }

        public enum rotationIntervalTypes
        {
            /// <summary>Setting a fixed interval</summary>
            FixedInterval,
            /// <summary>Setting a target (minimum) inteval</summary>
            TargetInterval
        }
        
        public enum removeDMTypes
        {
            /// <summary>Remove all DM</summary>
            RemoveAll,
            /// <summary>Remove no DM</summary>
            RemoveNone,
            /// <summary>Remove a fraction based on digestibility</summary>
            BasedOnDigestibility,
            /// <summary>Remove a user-defined fraction</summary>
            UseTheFractionSetBelow
        }

        public enum returnTypes
        {
            /// <summary>Return plant material as residue</summary>
            AsResidue,
            /// <summary>Return meterial as dung and urine</summary>
            AsDungUrine
        }

        public enum dungNContentTypes
        {
            /// <summary>Define the proportion of N returned as dung</summary>
            DefineProportion,
            /// <summary>Define the C:N of dung</summary>
            DefineCNratio,
        }
    }
}
```
          Manager AddUrinePatches
            DepositionLoad = 600
            FirstDepositionDate = 1972-08-15
            DepositionInterval = 2
            Depositions = 5
            DepositionDepth = 300
```csharp
// Adds a urine patch

using System;
using System.Xml.Serialization;
using Models.Core;
using Models.PMF;
using Models.Soils;
using Models.Soils.Nutrients;
using APSIM.Shared.Utilities;
using Models.Interfaces;

namespace Models
{
    [Serializable]
    public class Script : Model
    {
        // - Links to APSIM models
        [Link] Clock Clock;
        [Link] Fertiliser fertiliser;
        [ScopedLinkByName] ISolute urea;
        [Link] Soil mySoil;
        [Link] ISummary summary = null;

        // - Parameters for this manager
        [Separator("Addition of a single urine patch")]

        //[Description("Test date array: ")] public DateTime[] TestDates { get; set; }
        [Description("Date for the urine deposition: ")] public DateTime FirstDepositionDate { get; set; }
        [Description("Interval between depositions (years): ")] public double DepositionInterval { get; set; }
        [Description("Number of depositions (-): ")] public int Depositions { get; set; }
        [Description("Nitrogen load within the urine patch (kg N /ha): ")] public double DepositionLoad { get; set; }
        [Description("Depth in the soil to which urine is applied (mm): ")] public double DepositionDepth { get; set; }

        // - Outputs from this manager
        [XmlIgnore][Units("")] public DateTime[] DepositionDates { get; set; }
        [XmlIgnore][Units("")] public int DepositionMonth { get; set; }
        [XmlIgnore][Units("")] public int DepositionYear { get; set; }  // this will change with each sucessive urine patch

        // - Internal variables

        private double[] fractionUrine;  // fraction of urine that is applied to each layer
        private int nLayers;  // number of layers in the soil

        public event BiomassRemovedDelegate BiomassRemoved;  // - Event to add residue or dung to surface OM

        [EventSubscribe("StartOfSimulation")]
        private void OnStartOfSimulation(object sender, EventArgs e)
        {
            // sort out the array of dates
            int maxDepositions = Convert.ToInt32(Math.Floor((Clock.EndDate.Year - Clock.StartDate.Year ) / DepositionInterval));
            if (Depositions > maxDepositions)
                throw new Exception("Too many Depositions specified, the maximum possible in this simulation is " + maxDepositions);
               //summary.WriteMessage(this, "Too many Depositions specified, the maximum possible in this simulation is " + maxDepositions);
            DepositionDates = new DateTime[Depositions];
            for (int i = 0; i < Depositions; i++)
            {
                DepositionDates[i] = FirstDepositionDate.AddYears(Convert.ToInt32(i * DepositionInterval));
                summary.WriteMessage(this, "DepositionDates[i] " + i + "  " + DepositionDates[i].ToShortDateString());
            }
            DepositionYear = DepositionDates[0].Year;
              DepositionMonth = FirstDepositionDate.Month;

              // set the fraction of urine for each layer
            nLayers = mySoil.Thickness.Length;
            fractionUrine = new double[nLayers];
            double soilDepth = 0.0;
            double distFactor = 1.5;
            double atZ0;
            double atZ1;
            double totalProp = DepositionDepth * Math.Pow(1.0, distFactor) / (distFactor + 1.0);
                
            atZ1 = (DepositionDepth - soilDepth) * Math.Pow(1.0 - soilDepth / DepositionDepth, distFactor) / (distFactor + 1.0);
            for (int z = 0; z < nLayers; z++)
            {
                atZ0 = atZ1;
                soilDepth += mySoil.Thickness[z];
                atZ1 = (DepositionDepth - soilDepth) * Math.Pow(1.0 - soilDepth / DepositionDepth, distFactor) / (distFactor + 1);
                if (1.0 - (soilDepth / DepositionDepth) < 0.0)
                    atZ1 = 0;
                fractionUrine[z] = (atZ0 - atZ1) / totalProp;
            }
        }
        
        [EventSubscribe("DoManagement")]
        private void OnDoManagement(object sender, EventArgs e)
        {
            for (int i = 0; i < DepositionDates.Length; i++)
            {
                if (Clock.Today == DepositionDates[i])
                {
                    returnExcreta();
                       DepositionYear = Clock.Today.Year;
                }
            }

        }

        [EventSubscribe("DoManagementCalculations")]
        private void OnDoManagementCalculations(object sender, EventArgs e)
        {
        }



        // Return dung and urine
        private void returnExcreta()
        {
                double[] myUrineDeposition = new double[nLayers];
                double fractionNInUrea = 1 / 0.46;
                for (int z = 0; z < nLayers; z++)
                    myUrineDeposition[z] = DepositionLoad * fractionUrine[z]; // * fractionNInUrea;
                // "Urea" is being treated as UreaN at present (ditto for NO3 and NH4) - issue report #3353 submitted (5 Dec 2018)
                urea.AddKgHaDelta(SoluteSetterType.Fertiliser, myUrineDeposition);
        }
    }
}
```
          Manager FertiliseOnFixedDates
            FertiliserType = UreaN
            FertiliserDates = 5-jan, 5-feb, 5-mar, 5-apr, 5-aug, 5-sep, 5-oct, 5-nov, 5-dec
            Amount = 100
            AmountType = False
```csharp
using System;
using Models.Core;
using Models.PMF;
using APSIM.Shared.Utilities;
namespace Models
{
    [Serializable]
    public class Script : Model
    {
        [Link] Clock Clock;
        [Link] Fertiliser Fertiliser;
        
        [Separator("A component to apply fertiliser on one or more dates on every year of the simulation")]

        [Description("Type of fertiliser to apply? ")] public Fertiliser.Types FertiliserType { get; set; }

        [Description("Enter the fertilisation dates as dd-mmm with comma separation (any year information entered will be ignored): ")] public string[] FertiliserDates { get; set; }  // ignore for now

        [Description("Amount of fertiliser to be applied (kg /ha)")] public double Amount { get; set; }

        [Description("Is the above amount to be applied each time? (yes/ticked)? Or is it the total annual amount across all dates (no/unticked)")] public bool AmountType { get; set; }
        
        [EventSubscribe("DoManagement")]
        private void OnDoManagement(object sender, EventArgs e)
        {
            foreach (string ddMMM in FertiliserDates)
            {
                if (DateUtilities.DatesEqual(ddMMM, Clock.Today))
                {
                    if (AmountType)
                        Fertiliser.Apply(Amount: Amount, Type: FertiliserType);
                    else
                        Fertiliser.Apply(Amount: Amount / FertiliserDates.Length, Type: FertiliserType);
                }
            }
        }
    }
}
```
          Manager AutomaticIrrigation
            allowIrrigation = False
            seasonStart = 15-Aug
            seasonEnd = 30-May
            seasonsAllocation = 10000
            triggerDeficit = 50
            targetDeficit = 99
            returndays = 1
            maximumAmount = 30
            depthPAWC = 300
```csharp
using System;
using Models.Core;
using Models.PMF;
using Models.Soils;
using Models.Soils.Nutrients;
using System.Xml.Serialization;
using Models.PMF;
using APSIM.Shared.Utilities;

        
namespace Models
{
    [Serializable] 
    [System.Xml.Serialization.XmlInclude(typeof(Model))]
    public class Script : Model
    {
        //Communication to other modules
        [Link] ISummary summary = null;
        [Link] Irrigation Irrigation;
        [Link] Clock Clock;
        [Link] Soil Soil;
        [Link(IsOptional = true)] IPlant existingCrop;
       
        //User inputs from properties tab
        [Description("Turn irrigation on?")]
        public bool allowIrrigation { get; set; }
        [Description("Start of irrigation season (dd-MMM)")]
        public string seasonStart { get; set; }
        [Description("End of irrigation season (dd-MMM)")]
        public string seasonEnd { get; set; }
        [Description("Season allocation (mm)")]
        public double seasonsAllocation { get; set; }
        [Description("Deficit to trigger irrigation (% PAWC)")]
        public double triggerDeficit { get; set; }
        [Description("Deficit to stop irrigaton (% PAWC)")]
        public double targetDeficit { get; set; }
        [Description("Minimum days for irrigation to return")]
        public double returndays { get; set; }
        [Description("Maximum irrigation application (mm/day)")]
        public double maximumAmount { get; set; }
        [Description("Depth to calculate PAWC (mm)")]
        public double depthPAWC { get; set; }

        //Class members
        [XmlIgnore] public double TopSWdeficit { get; set; }
        [XmlIgnore] public double TopSWC { get; set; }
        [XmlIgnore] public double DaysSinceIrrigation { get; set; }
        [XmlIgnore] public double AmountToApply { get; set; }
        [XmlIgnore] public double SeasonAppliedAmount { get; set; }
        
        private bool IrrigationIsAllowed { get; set; }
        private bool SeasonIsOpen { get; set; }
        private bool CropIsActive { get; set; }
        private bool IrrigatorIsAvailable { get; set; }
        private bool SoilIsDry { get; set; }

        private DateTime StartDate;
        private DateTime EndDate;
        private double TopDUL;
        private double TopLL;
        private int nLayers;
    
        //Calculate static soil variables
        [EventSubscribe("StartOfSimulation")]
        private void OnStartOfSimulation(object sender, EventArgs e)
        {   
            //Set the season dates
            StartDate = DateTime.Parse(seasonStart + "-" + Clock.Today.Year.ToString());
            EndDate = DateTime.Parse(seasonEnd + "-" + Clock.Today.Year.ToString());
            
            //Can we irrigate at all?
            IrrigationIsAllowed = false; 
            if (allowIrrigation)
                IrrigationIsAllowed = true; 

            //Calculate soil water variables
            double depthFromSurface = 0.0;
            double fracLayer = 0.0;
            nLayers = Soil.Thickness.Length;
            for (int layer = 0; layer < nLayers; layer++)
            {
                fracLayer = Math.Min(1.0, (depthPAWC - depthFromSurface) / Soil.Thickness[layer]);
                TopLL += Soil.LL15mm[layer] * fracLayer;
                TopDUL += Soil.DULmm[layer] * fracLayer;
                depthFromSurface += Soil.Thickness[layer];
                if (depthFromSurface >= depthPAWC)
                    layer = nLayers;
            }
        }
             
        //Determine daily requirement for irrigation
        [EventSubscribe("StartOfDay")]
        private void OnStartOfDay(object sender, EventArgs e)
        {
            //Can we irrigate today?          
            SeasonIsOpen = isBetween(Clock.Today, StartDate, EndDate);

            //Is there a crop in the ground that needs irrigation?
            CropIsActive = false;
            if ((existingCrop != null) && (existingCrop.IsAlive))
                CropIsActive = true;
            //if ((existingCrop.Phenology.Stage >= 3.0) && (existingCrop.Phenology.Stage < 6.0))
          
            //Is the irrigator available?
            IrrigatorIsAvailable = false;
            DaysSinceIrrigation += 1;
            if (DaysSinceIrrigation >= returndays)
                IrrigatorIsAvailable = true;
          
            //Is the soil dry enough to require irrigation?
            SoilIsDry = false;
            double depthFromSurface = 0.0;
            double fracLayer = 0.0;
            TopSWC = 0.0;
            for (int layer = 0; layer < nLayers; layer++)
            //for (int layer = 0; depthFromSurface < depthPAWC + Soil.Thickness[layer]; layer++)
            {
                fracLayer = Math.Min(1.0, (depthPAWC - depthFromSurface) / Soil.Thickness[layer]);
                TopSWC += Soil.SoilWater.SWmm[layer] * fracLayer;
                depthFromSurface += Soil.Thickness[layer];
                if (depthFromSurface >= depthPAWC)
                    layer = nLayers;
            }
            
            TopSWdeficit = TopSWC - TopDUL;
            if (Math.Max(0.0, -TopSWdeficit) >= (TopDUL - TopLL) * (100 - triggerDeficit) / 100)
                SoilIsDry = true;
                
            //Are all the conditions ratifying irrigation
            if (IrrigationIsAllowed && SeasonIsOpen && CropIsActive && IrrigatorIsAvailable && SoilIsDry)
            {
                //Lets bloody well irrigate then!!!!
                AmountToApply = TopDUL * targetDeficit / 100 - TopSWC;
                AmountToApply = Math.Max(0.0, Math.Min(AmountToApply, seasonsAllocation - SeasonAppliedAmount));
                Irrigation.Apply(AmountToApply);
                DaysSinceIrrigation = 0;
                SeasonAppliedAmount += AmountToApply;
            }
        }
        
        ///Checks whether theDate is between iniDate and endDate (non-year specific)
        private bool isBetween(DateTime theDay, DateTime iniDate, DateTime endDate)
        {
            bool result = false;
            if (iniDate.DayOfYear < endDate.DayOfYear)
            {
                // period is within one year, ex: summer in the northern hemisphere
                if ((theDay.DayOfYear >= iniDate.DayOfYear) && (theDay.DayOfYear <= endDate.DayOfYear))
                    result = true;
            }
            else
            {
                // period goes over the end of the year, ex: summer in the southern hemisphere
                if ((theDay.DayOfYear >= iniDate.DayOfYear) || (theDay.DayOfYear <= endDate.DayOfYear))
                    result = true;
            }
            
            return result;
        }
    }
}
```
          Manager DoReportingSensit
            ReportName = Report
            HarvestedWt = 0
            IntervalNHA = 0
```csharp
using Models.Interfaces;
using Models.Utilities;
using APSIM.Shared.Utilities;
using Models.Soils;
using Models.Soils.Nutrients;
using Models.PMF;
using Models.Core;
using System.Xml.Serialization;
using System;


namespace Models
{
    [Serializable]
    public class Script : Model
    {
        [Link] private Zone zone;
        [Link] private Simulation Simulation;
        [Link] private Clock Clock;
        [Link] private Fertiliser fertiliser;
        [Link] private Soil mySoil;
        [Link] private ISummary summary;
        private double urineApplied;
        [ScopedLinkByName]
        private ISolute NO3;
        [ScopedLinkByName]
        private ISolute NH4;
        [ScopedLinkByName]
        private ISolute Urea;
        [ScopedLinkByName]
        private Nutrient Nutrient;
        // - Links to APSIM models
        [Link] AgPasture.Sward Pasture;

        //[ScopedLinkByName] Report.Report HarvestReport;

        [Separator("Point to component and true/false variable for the harvesting")]
        [Description("Name of the component that does the reporting       :")] public string ReportName { get; set; }

        public double HarvestedWt { get; set; }
        public double IntervalNHA { get; set; }


        [XmlIgnore][Units("")] public DateTime[] ResetDates { get; set; }
        [XmlIgnore][Units("")] public DateTime[] ReportDates { get; set; }

        [XmlIgnore][Units("kgN/ha")] public double HerbageCut { get; set; }
        [XmlIgnore][Units("kgN/ha")] public double HerbageNCut { get; set; }
        [XmlIgnore][Units("kgN/ha")] public double Fixation { get; set; }
        [XmlIgnore][Units("kgN/ha")] public double LeachN { get; set; }
        [XmlIgnore][Units("kgN/ha")] public double Denit { get; set; }
        [XmlIgnore][Units("kgN/ha")] public double DenitN2O { get; set; }
        [XmlIgnore][Units("kgN/ha")] public double Drainage { get; set; }
        [XmlIgnore][Units("-")] public double PropLeached { get; set; }

        private double[] soilUrea;
        private double[] soilNH4;
        private double[] soilNO3;

        [EventSubscribe("StartOfSimulation")]
        private void OnStartOfSimulation(object sender, EventArgs e)
        {
            // set the reset and reporting dates
            DateTime[] urineDates = (DateTime[])Apsim.Get(zone, "[AddUrinePatches].Script.DepositionDates");
            ResetDates = new DateTime[urineDates.Length + 1];
            ReportDates = new DateTime[urineDates.Length + 1];
            for (int i = 0; i < urineDates.Length; i++)
            {
                ResetDates[i] = urineDates[i].AddDays(-1);  // -1 because this manager is after AddUrinePatches
                ReportDates[i] = urineDates[i].AddYears(2).AddDays(-2); // -2 to capture the data before the reset
                summary.WriteMessage(this, "ReportDate " + i + " " + ReportDates[i]);
            }
            soilUrea = new double[mySoil.Depth.Length];
            soilNH4 = new double[mySoil.Depth.Length];
            soilNO3 = new double[mySoil.Depth.Length];

            urineApplied = (double)Apsim.Get(zone, "[AddUrinePatches].Script.DepositionLoad");
               summary.WriteMessage(this, "DoReportingSensit has found a urineApplied value of " + urineApplied);

               summary.WriteMessage(this, "DoReportingSensit has initialised");
        }
        
        [EventSubscribe("DoManagement")]
        private void OnDoManagement(object sender, EventArgs e)
        {
            if (DateUtilities.Equals(ResetDates[0], Clock.Today))
            {
                soilUrea = Urea.kgha;
                soilNH4 = NH4.kgha;
                soilNO3 = NO3.kgha;
                summary.WriteMessage(this, "Capturing soil mineral N values for future resetting");
            }

            foreach (DateTime myDate in ResetDates)
            {
                if (DateUtilities.Equals(myDate, Clock.Today))
                {
                    Urea.kgha = soilUrea;
                    NH4.kgha = soilNH4;
                    NO3.kgha = soilNO3;
                    summary.WriteMessage(this, "Resetting soil mineral N values prior to urine deposition");
                }
            }

            DateTime[] urineDates = (DateTime[])Apsim.Get(zone, "[AddUrinePatches].Script.DepositionDates");
            foreach (DateTime myDate in urineDates)
            {
                if (DateUtilities.Equals(myDate, Clock.Today))
                {
                    HerbageCut = 0.0;
                    HerbageNCut = 0.0;
                    Fixation = 0.0;
                    LeachN = 0.0;
                    Denit = 0.0;
                    DenitN2O = 0.0;
                    Drainage = 0.0;
                    PropLeached = 0.0;
                    summary.WriteMessage(this, "Resetting reporting values");
                }
            }
        }

        [EventSubscribe("DoManagementCalculations")]
        private void OnDoManagementCalculations(object sender, EventArgs e)
        {
            HerbageCut += Pasture.HarvestedWt;
            HerbageNCut += Pasture.HarvestedN;
            Fixation += Pasture.FixedN;
            LeachN += mySoil.SoilWater.LeachUrea + mySoil.SoilWater.LeachNH4 + mySoil.SoilWater.LeachNO3;
            for (int i = 0; i < mySoil.Depth.Length; i++)
            {
                //Denit += Nutrient.Natm[i];
                //DenitN2O += Nutrient.N2Oatm[i];
            }
            Drainage += mySoil.SoilWater.Drainage;

            foreach (DateTime myDate in ReportDates)
            {
                if (DateUtilities.Equals(myDate, Clock.Today))
                {
                    if (urineApplied > 0.0)
                    {
                        PropLeached = LeachN / urineApplied;
                        summary.WriteMessage(this, "PropLeached calc first" + LeachN + " " + urineApplied);
                    }
                    else
                    {
                        PropLeached = 0.0;
                        summary.WriteMessage(this, "PropLeached calc second" + LeachN + " " + urineApplied);
                       }
                       Models.Report.Report myReportName = Apsim.Find(this, ReportName) as Models.Report.Report;
                    if (myReportName == null)
                           throw new Exception(string.Format("Unable to locate report {0}.", ReportName));
                    myReportName.DoOutput();
                }
            }
        }
    }
}
```
        MicroClimate: a_interception=0; b_interception=0; c_interception=0; d_interception=0; soil_albedo=0.23; SoilHeatFluxFraction=0.4; NightInterceptionFraction=0.5; ReferenceHeight=2
        Irrigation
        Fertiliser
        SurfaceOrganicMatter: InitialResidueName=Sward; InitialResidueType=grass; InitialResidueMass=1000; InitialStandingFraction=0; InitialCPR=0; InitialCNR=15; FractionFaecesAdded=0.5
        Soil: SoilType=Umbric Andosol (ANu); Country=New Zealan; Latitude=-37.967; Longitude=175.767
          DataSource=Romero, C.C., Hoogenboom, G., Baigorria, G.A., Koo, J., Gijsman, A.J., Wood, S., 2012. Reanalysis of a global soil database for crop and environmental modeling. Environmental Modelling & Software 35, 163-170.  https://harvestchoice.wufoo.com/forms/download-wisol.
          Comments=You will need to add crops to this soil before running simulations.
          Water
            Thickness  BD     AirDry  LL15   DUL    SAT    KS
            200        1.311  0.077   0.154  0.374  0.456  4832.039
            150        1.524  0.201   0.201  0.332  0.394  389.229
            200        1.42   0.299   0.299  0.426  0.442  21.6
            350        1.424  0.308   0.308  0.446  0.456  19.051
            SoilCrop SwardSoil: LL=[0.154, 0.201, 0.299, 0.308]; KL=[0.1, 0.1, 0.1, 0.05]; XF=[1, 0.8, 0.8, 0.3]
            SoilCrop RyegrassSoil: LL=[0.154, 0.201, 0.299, 0.308]; KL=[0.1, 0.1, 0.1, 0.05]; XF=[1, 0.8, 0.8, 0.3]
            SoilCrop WhiteCloverSoil: LL=[0.154, 0.201, 0.299, 0.308]; KL=[0.1, 0.1, 0.1, 0.05]; XF=[1, 0.8, 0.8, 0.3]
          SoilWater: SummerDate=1-Nov; SummerU=9.12; SummerCona=3; WinterDate=1-Apr; WinterU=9.12; WinterCona=3; DiffusConst=0; DiffusSlope=0; Salb=0.13; CN2Bare=73; CNRed=0; CNCov=0; max_pond=0; Thickness=[180, 120, 210, 230]; SWCON=[0.5, 0.5, 0.5, 0.7]; ResidueInterception=0
          SoilOrganicMatter: RootCN=0; EnrACoeff=0; EnrBCoeff=0; OCUnits=Total
            Thickness  OC   SoilCN  FBiom  FInert  RootWt
            180        7.9  11.01   0.06   0.26    0
            120        2    11.01   0.04   0.5     0
            210        1    11.01   0.02   0.9     0
            230        0.5  11.01   0.01   0.99    0
          Analysis: Thickness=[180, 120, 210, 230]; PH=[5.6, 6.2, 6.2, 6.4]; PHUnits=Water; BoronUnits=0
          InitialWater Initial Water: PercentMethod=0; FractionFull=1
          Sample Initial nitrogen: NO3Units=ppm; NH4Units=ppm; SWUnits=Volumetric; OCUnits=Total; PHUnits=Water
            Thickness  NO3  NH4
            180        10   0.1
            120        10   0.1
            210        1    0.1
            230        0.1  0.1
          CERESSoilTemperature
          Nutrient
            DirectedGraphInfo={Nodes=[{Name=Inert, OutlineColour=Black}, {Name=SurfaceResidue, OutlineColour=Black}, {Name=FOMLignin, OutlineColour=Black}, {Name=FOMCellulose, OutlineColour=Black}, {Name=FOMCarbohydrate, OutlineColour=Black}, {Name=Microbial, OutlineColour=Black}, {Name=Humic, OutlineColour=Black}, {Name=Urea, OutlineColour=Black}, {Name=NO3, OutlineColour=Black}, {Name=NH4, OutlineColour=Black}, {Name=Atmosphere, OutlineColour=White}, {Name=PlantAvailableNO3, OutlineColour=Black}, {Name=PlantAvailableNH4, OutlineColour=Black}], Arcs=[{SourceName=SurfaceResidue, DestinationName=Microbial}, {SourceName=SurfaceResidue, DestinationName=Humic}, {SourceName=FOMLignin, DestinationName=Microbial}, {SourceName=FOMLignin, DestinationName=Humic}, {SourceName=FOMCellulose, DestinationName=Microbial}, {SourceName=FOMCellulose, DestinationName=Humic}, {SourceName=FOMCarbohydrate, DestinationName=Microbial}, {SourceName=FOMCarbohydrate, DestinationName=Humic}, {SourceName=Microbial, DestinationName=Microbial}, {SourceName=Microbial, DestinationName=Humic}, {SourceName=Humic, DestinationName=Microbial}, {SourceName=Urea, DestinationName=NH4}, {SourceName=NO3, DestinationName=Atmosphere}, {SourceName=NH4, DestinationName=NO3}]}
        Sward: ControlledBySward=0; WaterUptakeSource=soilarbitrator; NUptakeSource=soilarbitrator
          PastureSpecies Ryegrass: MaximumNUptake=10; Albedo=0.26; Gsmax=0.011; R50=200; InitialShootDM=1500; InitialRootDM=450; InitialRootDepth=750; ReferencePhotosyntheticRate=1; LightExtinctionCoefficient=0.5; GrowthTminimum=1; GrowthToptimum=20; GrowthTEffectExponent=1.7; HeatOnsetTemperature=28; HeatFullTemperature=35; HeatRecoverySumDD=30; HeatRecoveryTReference=25; ColdOnsetTemperature=1; ColdFullTemperature=-5; ColdRecoverySumDD=25; MaintenanceRespirationCoefficient=0.03; GrowthRespirationCoefficient=0.25; RespirationTReference=20; RespirationExponent=1.5; NThresholdsForLeaves=[0.04, 0.012, 0.05]; NThresholdsForStems=[0.02, 0.006, 0.025]; NThresholdsForStolons=[0, 0, 0]; NThresholdsForRoots=[0.02, 0.006, 0.025]; DegreesDayForGermination=125; TargetShootRootRatio=4; MaxRootAllocation=0.25; ShootRootGlfFactor=0.5; ReproSeasonReferenceLatitude=41; ReproSeasonTimingCoeff=0.14; ReproSeasonMaxAllocationIncrease=0.5; ReproSeasonAllocationCoeff=0.1; FractionLeafMaximum=0.7; FractionLeafMinimum=0.7; FractionLeafDMThreshold=500; FractionLeafDMFactor=2000; FractionLeafExponent=3; SpecificLeafArea=25; SpecificRootLength=100; ShootMaxEffectOnLAI=1000; MaxStemEffectOnLAI=1; LiveLeavesPerTiller=3; TissueTurnoverRateShoot=0.05; TissueTurnoverRateRoot=0.02; DetachmentRateShoot=0.08; TurnoverTemperatureMin=2; TurnoverTemperatureRef=20; TurnoverTemperatureExponent=1; TurnoverDroughtEffectMax=1; TurnoverDroughtThreshold=0.5; TurnoverDefoliationCoefficient=0.5; TurnoverDefoliationRootEffect=0.1; FractionNLuxuryRemobilisable=[0.1, 0.1, 0.1]; SoilSaturationEffectMax=0.1; MinimumWaterFreePorosity=-1; SoilSaturationRecoveryFactor=0.25; NDillutionCoefficient=0.25; GlfGeneric=1; GlfSoilFertility=1; PlantHeightMinimum=25; PlantHeightMaximum=600; PlantHeightMassForMax=10000; PlantHeightExponent=2.8; RootDepthMinimum=50; RootDepthMaximum=750; RootElongationRate=25; RootDistributionDepthParam=90; RootDistributionExponent=3.2; DigestibilitiesCellWall=[0.6, 0.6, 0.6, 0.2]; MinimumGreenWt=100; PreferenceForGreenOverDead=1; PreferenceForLeafOverStems=1
            zero: SpeciesFamily, PhotosyntheticPathway, UseHeatStressFactor, UseColdStressFactor, ColdRecoveryTReference, UseReproSeasonFactor, FractionToStolon, StolonEffectOnLAI, MinimumNFixation, MaximumNFixation, FractionStolonStanding, WaterAvailableMethod, NitrogenAvailableMethod
            PastureAboveGroundOrgan Leaves
              GenericTissue LeafCohort1
              GenericTissue LeafCohort2
              GenericTissue LeafCohort3
              GenericTissue Dead
            PastureAboveGroundOrgan Stems
              GenericTissue LeafCohort1
              GenericTissue LeafCohort2
              GenericTissue LeafCohort3
              GenericTissue Dead
            PastureAboveGroundOrgan Stolons
              GenericTissue LeafCohort1
              GenericTissue LeafCohort2
              GenericTissue LeafCohort3
              GenericTissue Dead
          PastureSpecies WhiteClover: MaximumNUptake=10; Albedo=0.26; Gsmax=0.011; R50=200; SpeciesFamily=1; PhotosyntheticPathway=0; InitialShootDM=500; InitialRootDM=150; InitialRootDepth=350; ReferencePhotosyntheticRate=1; LightExtinctionCoefficient=0.8; GrowthTminimum=2; GrowthToptimum=22; GrowthTEffectExponent=1.7; UseHeatStressFactor=0; HeatOnsetTemperature=30; HeatFullTemperature=36; HeatRecoverySumDD=20; HeatRecoveryTReference=25; UseColdStressFactor=0; ColdOnsetTemperature=2; ColdFullTemperature=-5; ColdRecoverySumDD=30; ColdRecoveryTReference=0; MaintenanceRespirationCoefficient=0.04; GrowthRespirationCoefficient=0.25; RespirationTReference=20; RespirationExponent=1.5; NThresholdsForLeaves=[0.045, 0.02, 0.055]; NThresholdsForStems=[0.0225, 0.01, 0.0275]; NThresholdsForStolons=[0.0225, 0.01, 0.0275]; NThresholdsForRoots=[0.0225, 0.01, 0.0275]; DegreesDayForGermination=125; TargetShootRootRatio=4; MaxRootAllocation=0.25; ShootRootGlfFactor=0.5; UseReproSeasonFactor=0; ReproSeasonReferenceLatitude=41; ReproSeasonTimingCoeff=0.14; ReproSeasonMaxAllocationIncrease=0.5; ReproSeasonAllocationCoeff=0.1; FractionLeafMaximum=0.56; FractionLeafMinimum=0.28; FractionLeafDMThreshold=500; FractionLeafDMFactor=2000; FractionLeafExponent=3; FractionToStolon=0.2; SpecificLeafArea=30; SpecificRootLength=45; StolonEffectOnLAI=0.3; ShootMaxEffectOnLAI=500; MaxStemEffectOnLAI=0.5; LiveLeavesPerTiller=3; TissueTurnoverRateShoot=0.05; TissueTurnoverRateRoot=0.02; DetachmentRateShoot=0.11; TurnoverTemperatureMin=2; TurnoverTemperatureRef=20; TurnoverTemperatureExponent=1; TurnoverDroughtEffectMax=1; TurnoverDroughtThreshold=0.5; TurnoverDefoliationCoefficient=0.5; TurnoverDefoliationRootEffect=0.1; FractionNLuxuryRemobilisable=[0.1, 0.1, 0.1]; MinimumNFixation=0.2; MaximumNFixation=0.6; SoilSaturationEffectMax=0.1; MinimumWaterFreePorosity=-1; SoilSaturationRecoveryFactor=0.25; NDillutionCoefficient=1; GlfGeneric=1; GlfSoilFertility=1; PlantHeightMinimum=25; PlantHeightMaximum=350; PlantHeightMassForMax=7500; PlantHeightExponent=2.5; RootDepthMinimum=30; RootDepthMaximum=350; RootElongationRate=25; RootDistributionDepthParam=70; RootDistributionExponent=2.5; DigestibilitiesCellWall=[0.6, 0.6, 0.6, 0.2]; MinimumGreenWt=50; FractionStolonStanding=0; PreferenceForGreenOverDead=1; PreferenceForLeafOverStems=1; WaterAvailableMethod=0; NitrogenAvailableMethod=0
            PastureAboveGroundOrgan Leaves
              GenericTissue LeafCohort1
              GenericTissue LeafCohort2
              GenericTissue LeafCohort3
              GenericTissue Dead
            PastureAboveGroundOrgan Stems
              GenericTissue LeafCohort1
              GenericTissue LeafCohort2
              GenericTissue LeafCohort3
              GenericTissue Dead
            PastureAboveGroundOrgan Stolons
              GenericTissue LeafCohort1
              GenericTissue LeafCohort2
              GenericTissue LeafCohort3
              GenericTissue Dead
        Report
          VariableNames:
            [Clock].Today.Year
            [AddUrinePatches].Script.DepositionYear as DepositionYear
            [DoReportingSensit].Script.LeachN as LeachN
  Memo AnalysisResults1
    # Analysis Results

    Once complete, the analysis produces three reports: `Report` (the base simulation report), a `PathAnalysis`, and `Statistics`. In this example the result are analysed using the graph node. Figure 1, in the `ReportAnalysis` node, shows an example of a graph produced using `Report` data.

    <hr>
    **Advanced**: If you require more flexibility, results may also be exported. Right click on `DataStore` and select `Export to EXCEL` or `Export output to text files`.
    <hr>
  Memo AnalysisResults2
    The global sensitivity measure *mu star* is based on a limited number of samples (or paths), meaning it is an estimate. It is important to check the estimate has stabilised. Note: In this simulation we used a relatively small number of paths, to reduce analysis run time. This means the results may in fact not have stabilised and may differ between runs! You can check the estimates using the `PathAnalysis` data source. Select the `PathAnalysis` node. The provided graph (Figure 2) shows an estimate of *mu star* for each sample size, from 1 to *n* (where *n* is the set number of paths). Each data series should flatten out as the number of paths increases. If this is not the case, try increasing the number of paths in the Morris node.
  Memo AnalysisResults3
    The `Statistics` data source holds *mu star* and *sigma* estimates for each input and output combination. A classic Morris method plot (with *mu star* on the *x*-axis and *sigma* on the *y*-axis) is shown in Figure 3. Select the `Statistics` node to view it. The plot contains five sensitivity estimates for each input (corresponding to five reporting years). The plot can be separated into four quadrants (note these are approximate and should only be used as a guideline):

    * Bottom left: low *mu star* and low *sigma*. Inputs that have little influence on the output and may be fixed.
    * Top left: low *mu star* and high *sigma*. Inputs that, on average, have little influence on the output, but have either a non-linear relationship with the output, or interactions with other inputs. Note that the Morris method cannot separate non-linearities from interaction effects.
    * Bottom right: high *mu star* and low *sigma*. Inputs that are influential, have a linear relationship with the output, and have no interactions with other inputs.
    * Top right: high *mu star* and high *sigma*. Inputs that are influential, but have either a non-linear relationship with the output, or interactions with other inputs.

    The five different estimates for each input give an indication of temporal variability. The nitrogen load appears to be the most important input contributing to variability in nitrogen leaching. Soil organic carbon and soil drainage are also important in some years however. All significant inputs are subject to interaction effects or non-linearities. The large spread observed in each estimate indicates high temporal variability.

    To get a better feel for the data produced by the analysis, try reconstructing the three graphs using a new graph node. You will need to select the correct data source and correct variables within that data source. Try using the `Filter` feature in the `Series` node to produce a less crowded plot.

    <br/>
  Memo Conclusion
    # Conclusion

    The urine patch deposition simulation was used to demonstrate the process of performing sensitivity analysis in APSIM. The steps required to set up a Morris analysis were outlined, and results that can be obtained using current functionality were shown. The Morris analysis plot (Figure 3) is particularly insightful, as it highlights inputs that drive output variability. The plot in Figure 3 also highlights the large variability observed year to year. The Morris method is not computationally intensive, and hence often serves as a preliminary analysis. The Sobol method or factorial ANOVA can be used to obtain a more quantitative result, perhaps focussing on a smaller number of inputs.

    <br/>
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