Simulations: Version=188
  DataStore
  Simulation
    Memo
      This simulation demonstrates 2 applications of a slow release fertiliser on the first 2 days. The fertiliser model maintains a pool of fertiliser applications that get released to the solute pools. The definition of the fertiliser has been added as a child of the fertiliser model (called 'SlowRelease' in this simulation). This definition contains the fractions of the application amount that goes to the solutes and the rate of release (child function  'ReleaseRate'). The 'ReleaseRate' function in this simulation is a function that multiplies a 'Lag' function by a 'Rate' function.

      * The lag function returns a value of 0 until [Water].PAWmm[1] is > a threshold of 5mm, after which it returns a value of 1)
      * The rate function is a constant value of 0.5.

      The result is that the rate won't be applied until the plant available water in the top layer reaches a value of 5mm. The functions can be replaced by other functions to change how the fertiliser is released to the solute pools.

      The graph at the bottom of the simulation shows the release of the 2 applications of fertiliser over time as well as the increase in NO3 in the top layer (where the fertiliser was added). You can see there is a lag of 10 days until lag criteria is satisfied.
    Clock: Start=1980-01-01; End=1980-01-31
    Summary
    Weather: FileName=%root%/Examples/WeatherFiles/AU_Dalby.met; Latitude=-27.18; Tav=19.09; Amp=14.63
    SoilArbitrator
    MicroClimate: a_interception=0; b_interception=1; c_interception=0; d_interception=0; SoilHeatFluxFraction=0.4; MinimumHeightDiffForNewLayer=0; NightInterceptionFraction=0.5; ReferenceHeight=2
    Zone Field: Area=1; Slope=0; AspectAngle=0; Altitude=50
      Manager Fertilise on fixed dates
        EachYear = True
        Dates = 1-jan, 2-jan
        UseCritNThreshold = False
        CritNThreshold = 50
        CritNDepth = 75
        Depth = 0
        Amount = 10
        FertiliserType = SlowRelease
```csharp
using Models.Interfaces;
using System.Linq;
using APSIM.Shared.Utilities;
using Models.PMF;
using Models.Soils;
using Models.Core;
using System;
using Models.Soils.Nutrients;

namespace Models
{
    [Serializable]
    public class Script : Model
    {
        [Link] private Clock clock;
        [Link] private Fertiliser fertiliser;
        [Link] private ISummary summary;
        [Link] private Soil soil;
        private Nutrient nutrient;
        [Link]
        private IPhysical soilPhysical;


        [Separator("Fertiliser will be applied on the date(s) below")]
        [Description("Apply fertiliser on the same day(s) each year? If no, then must include the year of appliaction below")]
        public bool EachYear { get; set; }

        [Description("Dates for one or more fertiliser applications (dd-mmm or dd-mmm-yyyy) as a list with a comma between dates")]
        public string[] Dates { get; set; }

        [Separator("Test for the mineral N in the soil and don't apply the fertiliser if greater than X kgN/ha is stored in the soil above a depth of Y mm")]
        [Description("Use a critical soil mineral N to prevent application above a threshold?")]
        public bool UseCritNThreshold { get; set; }

        [Description("Don't add fertiliser if N in the soil to the depth below exceeds (kg/ha)")]
        public double CritNThreshold { get; set; }

        [Description("Depth to which the amount of N in the soil should be calculated (mm)")]
        public double CritNDepth { get; set; }

        [Separator("Fertiliser application details")]
        [Description("Depth at which to apply the fertiliser (mm)")]
        public double Depth { get; set; }

        [Description("Amount of fertiliser to apply (kg N /ha) per application")]
        public double Amount { get; set; }

        [Description("Fertiliser type - select from the list")]
        [Display(Type = DisplayType.FertiliserType)]public string FertiliserType { get; set; }


        [EventSubscribe("StartOfSimulation")]
        private void FindSoilNOrNutrient(object sender, EventArgs e)
        {
            nutrient = this.FindInScope<Nutrient>() as Nutrient;

            if (nutrient == null)
                throw new Exception(string.Format("Error in script {0}: Unable to find nutrient.", Name));
        }

        [EventSubscribe("DoManagement")]
        private void OnDoManagement(object sender, EventArgs e)
        {
            if (OnApplicationDate())
            {
                if (NContentBelowThreshold())
                    fertiliser.Apply(Amount, FertiliserType, Depth);
                else
                    summary.WriteMessage(this, "Skipping fertiliser application due to soil mineral N content being above critical threshold.", MessageType.Diagnostic);
            }
        }

        /// <summary>Checks if today's date is one of the specified fertiliser application dates.</summary>
        private bool OnApplicationDate()
        {
            if (EachYear)
                return Dates.Any(d => DateUtilities.DatesEqual(d, clock.Today));
            
            DateTime[] dates = Dates.Select(d => DateTime.ParseExact(d, "d-MMM-yyyy", null)).ToArray();
            return dates.Any(d => SameDate(d, clock.Today));
        }

        /// <summary>Checks if N content in soil is below critical threshold.</summary>
        private bool NContentBelowThreshold()
        {
            if (!UseCritNThreshold)
                return true;
            
            double[] weights = GetLayerWeights();
            double cumSoilN = 0;

            for (int i = 0; i < soilPhysical.Thickness.Length; i++)
            {
                cumSoilN += weights[i] * nutrient.MineralN[i];
            }

            return cumSoilN <= CritNThreshold;
        }

        private double[] GetLayerWeights()
        {
            double[] weights = new double[soilPhysical.Thickness.Length];
            double cumDepth = 0;

            for (int i = 0; i < soilPhysical.Thickness.Length; i++)
            {
                cumDepth += soilPhysical.Thickness[i];
                if (cumDepth < CritNDepth)
                    weights[i] = 1;
                else if (cumDepth - soilPhysical.Thickness[i] <= CritNDepth)
                    weights[i] = (CritNDepth - (cumDepth - soilPhysical.Thickness[i])) / soilPhysical.Thickness[i];
                else
                    weights[i] = 0;
            }

            return weights;
        }

        private bool SameDate(DateTime d1, DateTime d2)
        {
            return d1.Year == d2.Year && d1.DayOfYear == d2.DayOfYear;
        }
    }
}
```
      Fertiliser
        FertiliserType SlowRelease: Description=Slow release; FractionWhenRemainderReleased=0.995; Solute1Name=NO3; Solute1Fraction=1; Solute2Fraction=0; Solute3Fraction=0; Solute4Fraction=0; Solute5Fraction=0; Solute6Fraction=0
          MultiplyFunction ReleaseRate
            WaitForThresholdFunction Lag: ThresholdValue=5
              VariableReference SWTopLayer: VariableName=[Water].PAWmm[1]
            Constant Rate: FixedValue=0.5
      Soil: ASCOrder=Vertosol; ASCSubOrder=Black; SoilType=Clay; Site=Norwin; NearestTown=Norwin; Region=Darling Downs and Granite Belt; State=Queensland; Country=Australia; NaturalVegetation=Qld. Bluegrass, possible Qld. Blue gum; ApsoilNumber=900; Latitude=-27.581836; Longitude=151.320206; LocationAccuracy=+/- 20m; YearOfSampling=0
        DataSource=CSIRO Sustainable Ecosystems, Toowoomba; Characteriesd as part of the GRDC funded project"Doing it better, doing it smarter, managing soil water in Australian agriculture' 2011
        Comments=Clay - OC, CLL for all crops estimated-based on Bongeen Mywybilla Soil No1
        Physical
          Thickness  ParticleSizeSand  ParticleSizeSilt  ParticleSizeClay  Rocks  BD       AirDry    LL15      DUL       SAT       KS
          150        5                 65                30                0      1.01056  0.13025   0.2605    0.521     0.588655  20
          150        5                 65                30                0      1.07146  0.198689  0.248362  0.496723  0.565677  20
          300        5                 65                30                0      1.09394  0.28      0.28      0.488438  0.557193  20
          300        5                 65                30                0      1.15861  0.28      0.28      0.480297  0.532787  20
          300        5                 65                30                0      1.17301  0.28      0.28      0.471584  0.527354  20
          300        5                 65                30                0      1.16287  0.28      0.28      0.457071  0.53118   20
          300        5                 65                30                0      1.1875   0.28      0.28      0.452332  0.521888  20
          Rocks, ParticleSizeSand, ParticleSizeSilt, ParticleSizeClay source: Calculated
          SoilCrop WheatSoil: LL=[0.261, 0.248, 0.28, 0.306, 0.36, 0.392, 0.446]; KL=[0.06, 0.06, 0.06, 0.04, 0.04, 0.02, 0.01]; XF=[1, 1, 1, 1, 1, 1, 1]
        WaterBalance SoilWater: SummerDate=1-Nov; SummerU=5; SummerCona=5; WinterDate=1-Apr; WinterU=5; WinterCona=5; DiffusConst=40; DiffusSlope=16; Salb=0.12; CN2Bare=73; CNRed=20; CNCov=0.8; PSIDul=-100; Thickness=[150, 150, 300, 300, 300, 300, 300]; SWCON=[0.3, 0.3, 0.3, 0.3, 0.3, 0.3, 0.3]
        Organic: FOMCNRatio=40; CarbonUnits=Total
          Thickness  Carbon  SoilCNRatio  FBiom  FInert  FOM
          150        1.2     12           0.04   0.4     347.129
          150        0.96    12           0.02   0.6     270.344
          300        0.6     12           0.02   0.8     163.972
          300        0.3     12           0.02   1       99.4541
          300        0.18    12           0.01   1       60.322
          300        0.12    12           0.01   1       36.5871
          300        0.12    12           0.01   1       22.1912
        Chemical: Thickness=[150, 150, 300, 300, 300, 300, 300]; PH=[8, 8, 8, 8, 8, 8, 8]; PHUnits=Water
        Water: Thickness=[150, 150, 300, 300, 300, 300, 300]; InitialValues=[0.2605, 0.248362, 0.28, 0.28, 0.28, 0.28, 0.28]; InitialPAWmm=0; RelativeTo=LL15; FilledFromTop=false
        CERESSoilTemperature Temperature
        Nutrient
        Solute NO3: Thickness=[150, 150, 300, 300, 300, 300, 300]; InitialValues=[1, 1, 1, 1, 1, 1, 1]; InitialValuesUnits=ppm; WaterTableConcentration=0; D0=0; DepthConstant=0; MaxDepthSoluteAccessible=0; RunoffEffectivenessAtMovingSolute=0; MaxEffectiveRunoff=0
        Solute NH4: Thickness=[150, 150, 300, 300, 300, 300, 300]; InitialValues=[0.1, 0.1, 0.1, 0.1, 0.1, 0.1, 0.1]; InitialValuesUnits=ppm; WaterTableConcentration=0; D0=0; DepthConstant=0; MaxDepthSoluteAccessible=0; RunoffEffectivenessAtMovingSolute=0; MaxEffectiveRunoff=0
        Solute Urea: Thickness=[150, 150, 300, 300, 300, 300, 300]; InitialValues=[0, 0, 0, 0, 0, 0, 0]; InitialValuesUnits=kg/ha; WaterTableConcentration=0; D0=0; DepthConstant=0; MaxDepthSoluteAccessible=0; RunoffEffectivenessAtMovingSolute=0; MaxEffectiveRunoff=0
      SurfaceOrganicMatter: InitialResidueName=wheat; InitialResidueType=wheat; InitialResidueMass=1000; InitialStandingFraction=0; InitialCPR=0; InitialCNR=60
      Report
        VariableNames:
          [Clock].Today
          [Fertiliser].NitrogenApplied
          [NO3].kgha[1]
          [Water].PAWmm[1]
          [Weather].Rain
          [water].Volumetric[1]
        EventNames:
          [Clock].EndOfDay
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