Simulations: Version=204
  DataStore
  Memo Overview
    # Enabling Treading Effects on Soil and Pasture

    Val Snow and Mike Dodd (New Zealand Bioeconomy Science Institute) and Dean Holzworth (CSIRO, Australia)

    (Last updated 30 October 2025)

    The intention is that this documentation is read alongside the simulation that produced it to see the detail of the examples. The simulation is to be found under the "Examples" button, then select the “Tutorials” folder and open “TreadingDamageinPastures.apsimx”.

    ## Overview

    Treading damage is defined as the (negative) effect of stock hooves on soil properties and pasture growth. Some of the key features of treading damage are that:
    * treading damage compacts the soil mainly affecting the macropores (the soil pores that hold the water between DUL and Saturation) by reducing their prevalence in the soil;
    * the reduced macroporosity reduces the aeration (air content) at DUL and also reduces the saturated hydraulic conductivity;
    * the heavier the stock, the greater the number of stock, and the longer the duration of grazing, the greater the damage; and
    * if the soil is drier than DUL, there is negligible treading damage but as the soil gets wetter it becomes more susceptible to damage.

    These changes in the soil properties indirectly affect pasture growth through lack of aeration to the roots, and various effects of changed soil properties on C and N cycling.
    Treading damage also affects the pasture directly through direct damage to growing points and burial of biomass (including growing points. These effects recover over time - generally in a matter of a few months unless the treading damage is catastrophic (e.g., heavy pugging).

    These effects can be captured in APSIM using the *TreadingDamage* manager - found in the *Management Toolbox* under the *Pasture Graze Stock* folder. This manager will allow the user to link treading damage to grazing events. Alternatively, the user can specify dates for mock grazing (stock pressure but no pasture biomass removal).

    # How *TreadingDamage* works
    The effects of treading damage are coded into *TreadingDamage* which in turn interacts with *SimpleGrazing* module currently used to control pasture harvesting, and with the *Soil Physical* module that describes the relevant properties of the soil profile
    (macroporosity, drained upper limit and infiltration rate). In the current implementation, the user specifies the grazing pressure - that is the liveweight of stock per hectare per hour (t LW /ha /hour) by specifying the stocking density (head /ha /24-hours) and the per head liveweight (kg LW /head). On the days when there is a positive stocking density (meaning that there is either a grazing event from *SimpleGrazing* or the user has specified a mock grazing event) *TreadingDamage* will:

    * calculate a water factor that rises from zero at the drained upper limit to a value of one at saturation;
    * calculate an effective grazing pressure by multiplying the grazing pressure by the water factor;
    * calculate an empirically-derived treading effect that rises asymptotically from zero at no effective grazing pressure to a value of 0.95 at about 4800 t LW /ha /24-hours (see Figure 1);
    * calculate a damage effect, seperately for soil and pasture components, by adding the treading effect to any pre-existing damage;
    * impose the damage on the pasture components and soil (more information on this below); and
    * if there is no additional damage on a given day then there is a recovery of damage towards the undamaged state.

    Figure 1 shows the relationship between effective grazing pressure and treading effect for the default parameters. For reference, 500 kg LW dairy cows mobbed up for winter grazing at 400 cows /ha for a full day would generate a grazing pressure of 4800 t LW /ha /24-hours. If the soil was half way between DUL nad  saturation then the effective grazing pressure would be 2400 t LW /ha /24-hours and that would generate a treading effect of 0.78.

    ![Plot of the effect of Effective Grazing Pressure on Treading Effect](TreadingEffect.png)

    Figure 1. Relationship between Effective Grazing Pressure and Treading Effect when using the default parameters.

    For the pasture components, currently only relevant for species in the AgPasture template, the damage effect is imposed using a 1:1 effect on the parameter *GLFGeneric*. Two soil properties are affected by the damage function. Saturated hydraulic conductivity is decreased when the soil is damaged with the maximum effect (damage effect = 1) being defined as a reduction to a conductivity twice that at DUL - often a value of 1 mm /day is used for conductivity at DUL. The second soil property damaged is the macroporosity. We assume that total porosity and bulk density are unchanged so the damage effect is imposed by increasing DUL towards saturation with the maximum effect leaving only 0.02 between saturation and DUL. This method is consitent with a transfer of some of the larger pores into a greater number of smaller pores. A side-effect is that the plant-available water (DUL-LL15) will also increase but this seems consistent with general understanding of how treading changes soil structure.

    The soil damage function is imposed with depth in the soil with a constant effect to a specified depth and a curvilinear decline in the effect until it is less that 5% of the surface damage at a second specified depth. Values of 100 and 250 mm are often suitable.

    There was minimal information available in the literature to parameterise recovery rates but a lot of anecdotal information that recovery was largely complete within 23-28 weeks. This was implemented in *TreadingDamage* via a first-order recovery rate. The default parameter value is 0.015 and that allows recovery within that time line. Seperate recivery rates for the pasture species and soil are allowed for in the user interface.

    # Assumptions

    There are several assumptions in this damage effect. They include:
    * the plant above and below ground biomass is not directly damaged by treading events;
    * damage effects are additive meaning that:
    	* if there is a pre-existing damage effect of 0.2 and a new treading effect of 0.3 happens then the damage effect is increased to 0.5; and
    	* and already-damaged soil or pasture is not more suseptible to damage than an undamaged soil/pasture (no concept of changing soil strength is included).
    * *TreadingDamage* does not capture the effect of catastrophic pugging to the soil and pasture such that would usually mean the need for cultivation and resowing; and
    * the recovery rate implicitly assumes that the soil/pasture will be sensibly managed after a damage event so that it has the oppotunity to reciver.

    ## References

    Snow VO, Dodd MB, Nichols S, Triadis D (2025) Quantifying the impacts of higher water tables on pasture production. Report for NIWA, Contract CO1X2107. Client Report Number RE450/2025/008

    Dodd MB, Snow VO, Triadis D (2025) Incorporating treading damage on wet soils in APSIM. MODSIM 2025
  Experiment Grazing
    Factors
      Permutation
        Factor CowLW: Specification=[TreadingDamage].Script.CowLiveweight = 0, 450
    Folder
    Simulation Sim
      Clock: Start=2000-07-01; End=2003-06-30
      Weather: FileName=%root%/Examples/WeatherFiles/NZ_Hamilton.met
      MicroClimate: a_interception=0; b_interception=1; c_interception=0; d_interception=0; SoilHeatFluxFraction=0.4; MinimumHeightDiffForNewLayer=0; NightInterceptionFraction=0.5; ReferenceHeight=2
      SoilArbitrator
      Forages
        Parameters:
          Name                          LiveDigestibility  DeadDigestibility  LiveFractionConsumable  DeadFractionConsumable  LiveMinimumBiomass  DeadMinimumBiomass
          SurfaceOrganicMatter.Residue  0.7                0.3                0                       0                       0                   0
          AGPRyegrass.Leaf              FromModel          FromModel          1                       1                       25                  0
          AGPRyegrass.Stem              FromModel          FromModel          1                       1                       10                  0
          AGPRyegrass.Stolon            FromModel          FromModel          1                       1                       0                   0
          AGPWhiteClover.Leaf           FromModel          FromModel          1                       1                       15                  0
          AGPWhiteClover.Stem           FromModel          FromModel          1                       1                       5                   0
          AGPWhiteClover.Stolon         FromModel          FromModel          1                       1                       5                   0
      Summary
      Zone Field: Area=1; Slope=0; AspectAngle=0; Altitude=50
        SimpleGrazing: GrazingRotationType=0; SimpleGrazingFrequencyString=21; SimpleMinGrazable=0; SimpleGrazingResidual=1500; FlexibleGrazePostDM=0; IsCutAndCarry=false; FractionClippingsReturned=0; FractionIntakeNToAnimal=[0]; DungNConc=2.6; FractionOfDungUrineOffPaddock=[0.3]; DepthUrineIsAdded=150; ShowAdvancedExcretaOptions=false; SendDungElsewhere=0; SendUrineElsewhere=0; UsePatching=false; PseudoPatches=true; ZoneCount=25; UrineReturnPattern=2; PseudoRandomSeed=666; MaxEffectiveNConcentration=3.5; FractionPopulationDecline=0; TramplingOn=false; MaximumPropLitterMovedToSoil=0.1; PastureConsumedAtMaximumRateOfLitterRemoval=1200
          PreGrazeDMArray=[1000, 1000, 1000, 1000, 1000, 1000, 1000, 1000, 1000, 1000, 1000, 1000]
          PostGrazeDMArray=[2000, 2000, 2000, 2000, 2000, 2000, 2000, 2000, 2000, 2000, 2000, 2000]
        Manager TreadingDamage
          GrazingMode = True
          EachYear = False
          Dates = 15-mar-2002
          CowLiveweight = 450
          CowStockingDensityByMonth = 100, 100, 100, 100, 100, 300, 300, 100, 100, 100, 100, 100
          PressureMultiplier = -0.639471
          DamageRyegrass = True
          DamageClover = True
          DamageSoil = True
          Grass = [AGPRyegrass]
          RecoveryRateGrass = 0.015
          Clover = [AGPWhiteClover]
          RecoveryRateClover = 0.015
          DepthDamage100Soil = 100
          DepthDamage005Soil = 250
          RecoveryRateSoil = 0.015
```csharp
using Newtonsoft.Json;
using APSIM.Shared.Utilities;
using Models.Utilities;
using Models.Soils;
using Models.PMF;
using Models.Core;
using System;
using System.Linq;
using Models.AgPasture;
using System.Diagnostics;

namespace Models
{
	[Serializable]
	public class Script : Model
	{
		[Link] private Clock clock;
		
		[Link] private ISummary summary;
		[Link] private SimpleGrazing simpleGrazing;
		[Link] private IPhysical physical;
		[Link] private Swim3 swim3;
		
		
        [Separator("This Manager must be placed after SimpleGrazing")]
        [Separator("Chose if the damage will be based on grazing events or on specified days")]

		[Description("Damage based on grazing events (true/ticked)? The alternative (false) will be based on specifed days")]
		public bool GrazingMode {get; set;}
		
		[Description("Damageable grazing on the same day(s) each year? If no, then must include the year below")]
		public bool EachYear {get; set;}
		
		[Description("Dates for one or more grazing pressure events (dd-mmm or dd-mmm-yyyy)")]
		public string[] Dates {get; set;}
		
        [Separator("Stock characteristics")]
		
		[Description("Cow liveweight (kg)")]
		public double CowLiveweight {get; set;}

		[Description("Assumed stocking density by month (cows /ha /24-hours)")]
		public double[] CowStockingDensityByMonth {get; set;}
 
		public double CowStockingDensity {get; set;}



        [Separator("Calculation of the damage effect from grazing pressure")]

		[Description("Multiplier on grazing pressure (*10^-3) - see the documentation for an explanation")]
		public double PressureMultiplier {get; set;}
		
		[Description("Damage ryegrass?")]
		public bool DamageRyegrass {get; set;}
		
		[Description("Damage clover?")]
		public bool DamageClover {get; set;}
		
		[Description("Damage soil?")]
		public bool DamageSoil {get; set;}
		
		

        [Separator("Effect of the damage on the plants. Damage is 1:1 on the GLFGeneric.")]

		[Description("Grass species")] public PastureSpecies Grass {get; set;}

		[Description("Recovery rate for grass (/d)")]
		public double RecoveryRateGrass {get; set;}

		[Description("Clover species")] public PastureSpecies Clover {get; set;}
		
		[Description("Recovery rate for clover (/d)")]
		public double RecoveryRateClover {get; set;}

        [Separator("Effect of the damage on the soil properties")]

		[Description("Depth in the soil before damage starts decreasing (mm)")]
		public double DepthDamage100Soil {get; set;}

		[Description("Depth in the soil where damage is <5% of surface damage (mm)")]
		public double DepthDamage005Soil {get; set;}

		[Description("Recovery rate for soil - applies to both Ks and macroporosity (/d)")]
		public double RecoveryRateSoil {get; set;}



        // outputs
		public double DamageUnitsGrass {get; set;}
		public double DamageUnitsClover {get; set;}
		public double DamageUnitsSoil {get; set;}
		
		public double[] MaxPossChangeMacroporosity {get; set;}
		public double[] MaxPossChangeConductivity {get; set;}
		public double[] DepthFunctionForDamage {get; set;}
		
		public double GrazingPressure {get; set;}
		public double EffectiveGrazingPressure {get; set;}
		public double WaterFactor {get; set;}
		public double TreadingEffect {get; set;}
		public double[] DepthDamageFunction {get; set;}
		
		public double MinimumMacroporosity {get; set;}
		
		public double[] UndamagedKSat {get; set;}
		public double[] UndamagedMacroporosity {get; set;}
		public double[] UndamagedSAT {get; set;}
		public double[] UndamagedDUL {get; set;}
		
		
        [EventSubscribe("StartOfSimulation")]
        private void OnStartOfSimulation(object sender, EventArgs e)
		{
			//Debugger.Break();

            MaxPossChangeConductivity = new double[physical.Thickness.Length];
            MaxPossChangeMacroporosity = new double[physical.Thickness.Length];
            DepthFunctionForDamage = new double[physical.Thickness.Length];
            DepthDamageFunction = new double[physical.Thickness.Length];

            MinimumMacroporosity = 0.02;
            UndamagedSAT = (double[]) physical.SAT.Clone();
            UndamagedDUL = (double[]) physical.DUL.Clone();
            UndamagedKSat = (double[]) physical.KS.Clone();

			
			// get the maximum possible changes in soil properties by depth
            for (int i = 0; i < physical.Thickness.Length; i++)
            {
                // Assume that the minimum Ks is twice the K at DUL
                MaxPossChangeConductivity[i] = physical.KS[i] - 2.0 * swim3.KDul;  // we are assuming that the change in soil physical propoerties is above DUL

                // Macroporosity is taken as the pore space from Saturation to DUL  
                MaxPossChangeMacroporosity[i] = physical.SAT[i] - physical.DUL[i] - MinimumMacroporosity;  

                // set up the depth function for damage to the soil
                DepthFunctionForDamage[i] = Math.Min(1.0,Math.Max(0.0,1.0 - (DepthDamage005Soil - physical.DepthMidPoints[i])/(DepthDamage005Soil-DepthDamage100Soil)));
                DepthFunctionForDamage[i] = Math.Exp(-4.0 * DepthFunctionForDamage[i]);
                if (DepthFunctionForDamage[i] < 0.02)
                    DepthFunctionForDamage[i] = 0.0;
            }
		}

		
		[EventSubscribe("DoManagement")]
		private void OnDoManagement(object sender, EventArgs e)
		{

            // water factor for the damage effect
            WaterFactor = 0.0;
            double SatTo100mm = 0.0;
            double DulTo100mm = 0.0;
            double ThetaTo100mm = 0.0;
            for (int i = 0; physical.DepthMidPoints[i] < DepthDamage100Soil; i++)
            {
                SatTo100mm += physical.SATmm[i];
                DulTo100mm += physical.DULmm[i];
                ThetaTo100mm += swim3.SWmm[i];
            }
            WaterFactor += Math.Max(0.0, (ThetaTo100mm - DulTo100mm) / (SatTo100mm - DulTo100mm));

            // do some damage if there is a grazing event or a specified day
            if ((simpleGrazing.GrazedToday && GrazingMode) || (OnApplicationDate()  && !GrazingMode))
            {
                // calculate the grazing pressures
		        CowStockingDensity = CowStockingDensityByMonth[clock.Today.Month - 1]; 
                GrazingPressure = CowLiveweight * CowStockingDensity * 24.0 / 1000.0;   // t LW /ha /hour
                EffectiveGrazingPressure = GrazingPressure * WaterFactor;
                TreadingEffect = 1.0 - Math.Exp(EffectiveGrazingPressure * PressureMultiplier / 1000.0);

                // finally add this into the dynamic damage units 
    	        if (DamageRyegrass)
        			DamageUnitsGrass = Math.Max(Math.Min(DamageUnitsGrass + TreadingEffect, 1.0), 0.0);
    			if (DamageClover)
        			DamageUnitsClover = Math.Max(Math.Min(DamageUnitsClover + TreadingEffect, 1.0), 0.0);
    			if (DamageSoil)
    			{
    			    DamageUnitsSoil = Math.Max(Math.Min(DamageUnitsSoil + TreadingEffect, 1.0), 0.0);
                       for (int i = 0; i < physical.Thickness.Length; i++)
                           DepthDamageFunction[i] = DamageUnitsSoil * DepthFunctionForDamage[i];
                }

        		// now have the damage units affect the plants and soil
        		Grass.GlfGeneric = 1.0 - DamageUnitsGrass;
    			Clover.GlfGeneric = 1.0 - DamageUnitsClover;
            	for (int i = 0; i < physical.Thickness.Length; i++)
                {
                    physical.KS[i] = UndamagedKSat[i] - MaxPossChangeConductivity[i] * DepthDamageFunction[i];
                    physical.DUL[i] = UndamagedDUL[i] + MaxPossChangeMacroporosity[i] * DepthDamageFunction[i];
                }
            }
            else  // add a test for some minimum level of damage?
            {
		        // not a damage day so zero out the damaging variables
		        CowStockingDensity = 0.0; 
                GrazingPressure = 0.0;
                EffectiveGrazingPressure = 0.0;
                TreadingEffect = 0.0;

		    	// no recovery on the damage day so the recover sits here
    		    DamageUnitsGrass -= DamageUnitsGrass * RecoveryRateGrass;
			    DamageUnitsClover -= DamageUnitsClover * RecoveryRateClover;
			    DamageUnitsSoil -= DamageUnitsSoil * RecoveryRateSoil;
				
				for (int i = 0; i < physical.Thickness.Length; i++)
                    DepthDamageFunction[i] = DamageUnitsSoil * DepthFunctionForDamage[i];

        		// now have the damage units affect the plants and soil
        		Grass.GlfGeneric = 1.0 - DamageUnitsGrass;
	    		Clover.GlfGeneric = 1.0 - DamageUnitsClover;
            	for (int i = 0; i < physical.Thickness.Length; i++)
                {
                    physical.KS[i] = UndamagedKSat[i] - MaxPossChangeConductivity[i] * DepthDamageFunction[i];
                    physical.DUL[i] = UndamagedDUL[i] + MaxPossChangeMacroporosity[i] * DepthDamageFunction[i];
                }


            }
                
		}
		
		
        // Checks if today's date is one of the specified dates
        private bool OnApplicationDate()
        {
            if (EachYear)
                return Dates.Any(d => DateUtilities.DatesEqual(d, clock.Today));
            
            DateTime[] dates = Dates.Select(d => DateTime.ParseExact(d, "d-MMM-yyyy", null)).ToArray();
            return dates.Any(d => SameDate(d, clock.Today));
        }
        
        private bool SameDate(DateTime d1, DateTime d2)
        {
            return d1.Year == d2.Year && d1.DayOfYear == d2.DayOfYear;
        }


	}
}
```
        Manager FertiliseFixedDates
          EachYear = True
          Dates = 5-jan, 5-feb, 5-mar, 5-apr, 5-aug, 5-sep, 5-oct, 5-nov, 5-dec
          UseCritNThreshold = False
          CritNThreshold = 50
          CritNDepth = 75
          Depth = 50
          Amount = 15
          FertiliserType = UreaN
```csharp
using APSIM.Core;
using System;
using Models.Core;
using Models.Soils.Nutrients;
using Models.Soils;
using Models.PMF;
using APSIM.Shared.Utilities;
using System.Linq;
using Models.Interfaces;

namespace Models
{
    [Serializable]
    public class Script : Model, IStructureDependency
    {
        [Link] private Clock clock;
        [Link] private Fertiliser fertiliser;
        [Link] private ISummary summary;
        [Link] private Soil soil;
        private Nutrient nutrient;
        private Nutrient soilN;
        [Link]
        private IPhysical soilPhysical;
        [Link]
        private Nutrient Nutrient;
        [Link(Path="[SurfaceOrganicMatter].SurfaceResidue.Decomposition")]
        private OrganicFlow ResidueDecomposition;
        public IStructure Structure { private get; set; }
        
        


        [Separator("Fertiliser will be applied on the date(s) below")]
        [Description("Apply fertiliser on the same day(s) each year? If no, then must include the year of application below")]
        public bool EachYear { get; set; }

        [Description("Dates for one or more fertiliser applications (dd-mmm or dd-mmm-yyyy) as a list with a comma between dates")]
        public string[] Dates { get; set; }

        [Separator("Test for the mineral N in the soil and don't apply the fertiliser if greater than X kgN/ha is stored in the soil above a depth of Y mm")]
        [Description("Use a critical soil mineral N to prevent application above a threshold?")]
        public bool UseCritNThreshold { get; set; }

        [Description("Don't add fertiliser if N in the soil to the depth below exceeds (kg/ha)")]
        public double CritNThreshold { get; set; }

        [Description("Depth to which the amount of N in the soil should be calculated (mm)")]
        public double CritNDepth { get; set; }

        [Separator("Fertiliser application details")]
        [Description("Depth at which to apply the fertiliser (mm)")]
        public double Depth { get; set; }

        [Description("Amount of fertiliser to apply (kg N /ha) per application")]
        public double Amount { get; set; }

        [Description("Fertiliser type - select from the list")]
        [Display(Type = DisplayType.FertiliserType)]public string FertiliserType { get; set; }


        [EventSubscribe("StartOfSimulation")]
        private void FindSoilNOrNutrient(object sender, EventArgs e)
        {
            nutrient =  Structure.Find<Nutrient>() as Nutrient;
            soilN =  Structure.Find<Nutrient>() as Nutrient;

            if (nutrient == null && soilN == null)
                throw new Exception(string.Format("Error in script {0}: Unable to find nutrient or soilN.", Name));
        }

        [EventSubscribe("DoManagement")]
        private void OnDoManagement(object sender, EventArgs e)
        {
            if (OnApplicationDate())
            {
                if (NContentBelowThreshold())
                    fertiliser.Apply(Amount, FertiliserType, Depth);
                else
                    summary.WriteMessage(this, "Skipping fertiliser application due to soil mineral N content being above critical threshold.", MessageType.Diagnostic);
            }
        }

        /// <summary>Checks if today's date is one of the specified fertiliser application dates.</summary>
        private bool OnApplicationDate()
        {
            if (EachYear)
                return Dates.Any(d => DateUtilities.DatesEqual(d, clock.Today));
            
            DateTime[] dates = Dates.Select(d => DateTime.ParseExact(d, "d-MMM-yyyy", null)).ToArray();
            return dates.Any(d => SameDate(d, clock.Today));
        }

        /// <summary>Checks if N content in soil is below critical threshold.</summary>
        private bool NContentBelowThreshold()
        {
            if (!UseCritNThreshold)
                return true;
            
            double[] weights = GetLayerWeights();
            double cumSoilN = 0;

            for (int i = 0; i < soilPhysical.Thickness.Length; i++)
            {
                if (nutrient != null)
                    cumSoilN += weights[i] * nutrient.MineralN[i];
                else if (soilN != null)
                    cumSoilN += weights[i] * soilN.MineralN[i];
            }

            return cumSoilN <= CritNThreshold;
        }

        private double[] GetLayerWeights()
        {
            double[] weights = new double[soilPhysical.Thickness.Length];
            double cumDepth = 0;

            for (int i = 0; i < soilPhysical.Thickness.Length; i++)
            {
                cumDepth += soilPhysical.Thickness[i];
                if (cumDepth < CritNDepth)
                    weights[i] = 1;
                else if (cumDepth - soilPhysical.Thickness[i] <= CritNDepth)
                    weights[i] = (CritNDepth - (cumDepth - soilPhysical.Thickness[i])) / soilPhysical.Thickness[i];
                else
                    weights[i] = 0;
            }

            return weights;
        }

        private bool SameDate(DateTime d1, DateTime d2)
        {
            return d1.Year == d2.Year && d1.DayOfYear == d2.DayOfYear;
        }
    }
}
```
        Manager Irrigate
          allowIrrigation = False
          seasonStart = 1-sep
          seasonEnd = 30-apr
          seasonsAllocation = 10000
          triggerDeficit = 25
          targetDeficit = 100
          returndays = 3
          maximumAmount = 30
          depthPAWC = 300
```csharp
using Newtonsoft.Json;
using APSIM.Shared.Utilities;
using System.Xml.Serialization;
using Models.Soils;
using Models.PMF;
using Models.Core;
using System;
using System.Linq;
using Models.Interfaces;



        
namespace Models
{
    [Serializable] 
    [System.Xml.Serialization.XmlInclude(typeof(Model))]
    public class Script : Model
    {
        [Link] private ISummary summary;
        [Link] private Irrigation Irrigation;
        [Link] private Clock Clock;
        [Link] private Soil Soil;
        [Link(IsOptional = true)] private IPlant existingCrop;
        private DateTime StartDate;
        private DateTime EndDate;
        private double TopDUL;
        private double TopLL;
        private int nLayers;
        [Link]
        private IPhysical soilPhysical;
        [Link]
        private ISoilWater waterBalance;
        //Communication to other modules
       
        //User inputs from properties tab
        [Description("Turn irrigation on?")]
        public bool allowIrrigation { get; set; }
        [Description("Start of irrigation season (dd-MMM)")]
        public string seasonStart { get; set; }
        [Description("End of irrigation season (dd-MMM)")]
        public string seasonEnd { get; set; }
        [Description("Season allocation (mm)")]
        public double seasonsAllocation { get; set; }
        [Description("Deficit to trigger irrigation (% PAWC)")]
        public double triggerDeficit { get; set; }
        [Description("Deficit to stop irrigaton (% PAWC)")]
        public double targetDeficit { get; set; }
        [Description("Minimum days for irrigation to return")]
        public double returndays { get; set; }
        [Description("Maximum irrigation application (mm/day)")]
        public double maximumAmount { get; set; }
        [Description("Depth to calculate PAWC (mm)")]
        public double depthPAWC { get; set; }

        //Class members
        [JsonIgnore] public double TopSWdeficit { get; set; }
        [JsonIgnore] public double TopSWC { get; set; }
        [JsonIgnore] public double DaysSinceIrrigation { get; set; }
        [JsonIgnore] public double AmountToApply { get; set; }
        [JsonIgnore] public double SeasonAppliedAmount { get; set; }
        
        private bool IrrigationIsAllowed { get; set; }
        private bool SeasonIsOpen { get; set; }
        private bool CropIsActive { get; set; }
        private bool IrrigatorIsAvailable { get; set; }
        private bool SoilIsDry { get; set; }

    
        //Calculate static soil variables
        [EventSubscribe("StartOfSimulation")]
        private void OnStartOfSimulation(object sender, EventArgs e)
        {   
            //Set the season dates
            StartDate = DateTime.Parse(seasonStart + "-" + Clock.Today.Year.ToString());
            EndDate = DateTime.Parse(seasonEnd + "-" + Clock.Today.Year.ToString());
            
            //Can we irrigate at all?
            IrrigationIsAllowed = false; 
            if (allowIrrigation)
                IrrigationIsAllowed = true; 

            //Calculate soil water variables
            double depthFromSurface = 0.0;
            double fracLayer = 0.0;
            nLayers = soilPhysical.Thickness.Length;
            for (int layer = 0; layer < nLayers; layer++)
            {
                fracLayer = Math.Min(1.0, (depthPAWC - depthFromSurface) / soilPhysical.Thickness[layer]);
                TopLL += soilPhysical.LL15mm[layer] * fracLayer;
                TopDUL += soilPhysical.DULmm[layer] * fracLayer;
                depthFromSurface += soilPhysical.Thickness[layer];
                if (depthFromSurface >= depthPAWC)
                    layer = nLayers;
            }
        }
             
        //Determine daily requirement for irrigation
        [EventSubscribe("StartOfDay")]
        private void OnStartOfDay(object sender, EventArgs e)
        {
            //Can we irrigate today?          
            SeasonIsOpen = isBetween(Clock.Today, StartDate, EndDate);
            if (!SeasonIsOpen)
                SeasonAppliedAmount = 0;

            //Is there a crop in the ground that needs irrigation?
            CropIsActive = false;
            if ((existingCrop != null) && (existingCrop.IsAlive))
                CropIsActive = true;
            //if ((existingCrop.Phenology.Stage >= 3.0) && (existingCrop.Phenology.Stage < 6.0))
          
            //Is the irrigator available?
            IrrigatorIsAvailable = false;
            DaysSinceIrrigation += 1;
            if (DaysSinceIrrigation >= returndays)
                IrrigatorIsAvailable = true;
          
            //Is the soil dry enough to require irrigation?
            SoilIsDry = false;
            double depthFromSurface = 0.0;
            double fracLayer = 0.0;
            TopSWC = 0.0;
            for (int layer = 0; layer < nLayers; layer++)
            //for (int layer = 0; depthFromSurface < depthPAWC + soilPhysical.Thickness[layer]; layer++)
            {
                fracLayer = Math.Min(1.0, (depthPAWC - depthFromSurface) / soilPhysical.Thickness[layer]);
                TopSWC += waterBalance.SWmm[layer] * fracLayer;
                depthFromSurface += soilPhysical.Thickness[layer];
                if (depthFromSurface >= depthPAWC)
                    layer = nLayers;
            }
            
            TopSWdeficit = TopSWC - TopDUL;
            if (Math.Max(0.0, -TopSWdeficit) >= (TopDUL - TopLL) * (100 - triggerDeficit) / 100)
                SoilIsDry = true;
                
            //Are all the conditions ratifying irrigation
            if (IrrigationIsAllowed && SeasonIsOpen && CropIsActive && IrrigatorIsAvailable && SoilIsDry)
            {
                //Lets bloody well irrigate then!!!!
                AmountToApply = TopDUL * targetDeficit / 100 - TopSWC;
                AmountToApply = Math.Max(0.0, Math.Min(AmountToApply, seasonsAllocation - SeasonAppliedAmount));
                AmountToApply = Math.Min(AmountToApply,maximumAmount);
                Irrigation.Apply(AmountToApply);
                DaysSinceIrrigation = 0;
                SeasonAppliedAmount += AmountToApply;
            }
        }
        
        ///Checks whether theDate is between iniDate and endDate (non-year specific)
        private bool isBetween(DateTime theDay, DateTime iniDate, DateTime endDate)
        {
            bool result = false;
            if (iniDate.DayOfYear < endDate.DayOfYear)
            {
                // period is within one year, ex: summer in the northern hemisphere
                if ((theDay.DayOfYear >= iniDate.DayOfYear) && (theDay.DayOfYear <= endDate.DayOfYear))
                    result = true;
            }
            else
            {
                // period goes over the end of the year, ex: summer in the southern hemisphere
                if ((theDay.DayOfYear >= iniDate.DayOfYear) || (theDay.DayOfYear <= endDate.DayOfYear))
                    result = true;
            }
            
            return result;
        }
    }
}
```
        Irrigation
        Fertiliser
        SurfaceOrganicMatter: InitialResidueName=Sward; InitialResidueType=grass; InitialResidueMass=1000; InitialStandingFraction=0; InitialCPR=0; InitialCNR=15
        PastureSpecies AGPRyegrass: doyGermination=275; daysEmergenceToAnthesis=120; daysAnthesisToMaturity=85; degreesDayForAnthesis=1100; degreesDayForMaturity=900; daysAnnualsFactor=45; CanopyType=PastureSpecies; InitialShootDM=1500; InitialRootDM=450; InitialRootDepth=750; initialDMFractionsGrasses=[0.15, 0.25, 0.25, 0.05, 0.05, 0.1, 0.1, 0.05, 0, 0, 0]; initialDMFractionsForbs=[0.2, 0.2, 0.15, 0.05, 0.1, 0.15, 0.1, 0.05, 0, 0, 0]; PhotosyntheticEfficiency=0.01; PhotosynthesisCurveFactor=0.8; FractionPAR=0.5; ReferenceCO2=380; CO2EffectScaleFactor=700; CO2EffectOffsetFactor=600; CO2EffectMinimum=0.7; CO2EffectExponent=2; ReproSeasonDurationCoeff=2; ReproSeasonShouldersLengthFactor=1; ReproSeasonOnsetDurationFactor=0.6; RelativeTurnoverEmerging=2; DetachmentDroughtCoefficient=3; DetachmentDroughtEffectMin=0.1; TurnoverStockFactor=0.01; TurnoverDefoliationEffectMin=0.025; MinimumGreenLeafProp=0.8; MinimumGreenRootProp=0.5
          initialDMFractionsLegumes=[0.16, 0.23, 0.22, 0.05, 0.03, 0.05, 0.05, 0.01, 0.04, 0.08, 0.08]
          LinearInterpolationFunction FVPDFunction
        PastureSpecies AGPWhiteClover: doyGermination=275; daysEmergenceToAnthesis=120; daysAnthesisToMaturity=85; degreesDayForAnthesis=1100; degreesDayForMaturity=900; daysAnnualsFactor=45; CanopyType=PastureSpecies; InitialShootDM=500; InitialRootDM=150; InitialRootDepth=350; initialDMFractionsGrasses=[0.15, 0.25, 0.25, 0.05, 0.05, 0.1, 0.1, 0.05, 0, 0, 0]; initialDMFractionsForbs=[0.2, 0.2, 0.15, 0.05, 0.1, 0.15, 0.1, 0.05, 0, 0, 0]; PhotosyntheticEfficiency=0.01; PhotosynthesisCurveFactor=0.8; FractionPAR=0.5; ReferenceCO2=380; CO2EffectScaleFactor=700; CO2EffectOffsetFactor=600; CO2EffectMinimum=0.7; CO2EffectExponent=2; ReproSeasonDurationCoeff=2; ReproSeasonShouldersLengthFactor=1; ReproSeasonOnsetDurationFactor=0.6; RelativeTurnoverEmerging=2; DetachmentDroughtCoefficient=3; DetachmentDroughtEffectMin=0.1; TurnoverStockFactor=0.01; TurnoverDefoliationEffectMin=0.025; MinimumGreenLeafProp=0.8; MinimumGreenRootProp=0.5
          initialDMFractionsLegumes=[0.16, 0.23, 0.22, 0.05, 0.03, 0.05, 0.05, 0.01, 0.04, 0.08, 0.08]
          LinearInterpolationFunction FVPDFunction
        Report: EventNames=[Clock].EndOfDay
          VariableNames:
            [Clock].Today as Date
            Sum of ([AGPRyegrass].HarvestedWt + [AGPWhiteClover].HarvestedWt) from 1-Jul to [Clock].Today as HarvestedWt   //the amount harvested (kg DM /ha)
            Max of [TreadingDamage].Script.GrazingPressure from [Report].DayAfterLastOutput to [Clock].Today as GrazingPressure
            Max of [TreadingDamage].Script.WaterFactor from [Report].DayAfterLastOutput to [Clock].Today as WaterFactor
            Max of [TreadingDamage].Script.EffectiveGrazingPressure from [Report].DayAfterLastOutput to [Clock].Today as EffectiveGrazingPressure
        Soil: ASCOrder=Gley; SoilType=Silt loam; LocalName=Taho (Silt loam (Opotiki No1347)); Site=Crooked Rd, south of junction with Dickenson Rd; NearestTown=Opotiki; Region=BayOfPlenty; Country=New Zealand; NaturalVegetation=long term grass; ApsoilNumber=1347; Latitude=-38.031; Longitude=177.25; LocationAccuracy=+/-50 m; YearOfSampling=1983
          DataSource=The database of New Zealand soils was compiled by AgResearch (www.agresearch.co.nz) and based on soil properties gathered, mainly from publications, in the course of conducting several simulation-based research projects but particularly from the Pastoral 21 Environment program which was funded by the New Zealand Ministry for Business, Innovation and Employment,  Dairy NZ, Fonterra and Meat & Wool NZ.
          Comments=The data is a combination of published or supplied measurements, pedotransfer functions, and expert opinion. See Cichota et al. (2013; Soil Research 51: 92-111, http://dx.doi.org/10.1071/SR12338) for a description of the pedotransfer functions. The soil carbon and fresh organic matter settings have been set as those broadly appropriate for permanent productive pastoral systems, see Cichota el al. (2012; Soil Research 50: 694-707, http://dx.doi.org/10.1071/SR12208). Users should take care to adapt these to local conditions before using the data in simulations. FOM values estimated to be 900 kg/ha of FOM in top 600mm of soil and another 100 kg/ha below.
          Physical
            Thickness  ParticleSizeSand  ParticleSizeSilt  ParticleSizeClay  Rocks  BD     AirDry  LL15   DUL    SAT    KS
            150        34                52                14                0      1.03   0.056   0.17   0.411  0.531  3186.27
            250        22                51                27                0      1.08   0.074   0.224  0.4    0.533  358.981
            250        32                53                15                0      0.89   0.048   0.144  0.375  0.59   795.543
            200        25                45                30                0      1.16   0.09    0.273  0.43   0.504  135.676
            300        52                36                12                0      1.14   0.06    0.183  0.378  0.493  2876.485
            1850       50                38                12                2      1.176  0.056   0.171  0.356  0.47   2676.044
            BD source: Field measured and checked for sensibility
            AirDry source: Estimated based on local knowledge
            LL15, DUL source: Laboratory measured
            SAT source: Calculated from measured, estimated or calculated BD
            SoilCrop AGPRyegrassSoil: LL=[0.17, 0.224, 0.144, 0.273, 0.183, 0.171]; KL=[0.06, 0.06, 0.056, 0.04, 0.04, 0.023]; XF=[1, 1, 1, 1, 1, 1]
              LL source: Estimated based on local knowledge
            SoilCrop AGPWhiteCloverSoil: same as Grazing.Sim.Field.Soil.Physical.AGPRyegrassSoil
          Swim3: Salb=0.13; CN2Bare=0; CNRed=0; CNCov=0.8; KDul=1; PSIDul=-100; VC=true; DTMin=0; DTMax=1440; MaxWaterIncrement=10; SpaceWeightingFactor=0; SoluteSpaceWeightingFactor=1; Dis=0; Disp=1; A=2; DTHC=0.1; DTHP=2; vcon1=7.28e-09; vcon2=7.26e-07; eo_time=06:00; eo_durn=720; default_rain_time=00:00; default_rain_duration=720; Diagnostics=false
          Organic: FOMCNRatio=40; CarbonUnits=Total
            Thickness  Carbon  SoilCNRatio  FBiom  FInert  FOM
            150        3.6     11.25        0.078  0.497   92.8391
            250        1       11.25        0.017  0.514   56.3098
            250        0.5     11.25        0.008  0.911   34.1536
            200        0.4     11.25        0.008  0.963   22.8938
            300        0.5     11.25        0.008  0.99    12.5644
            1850       0.5     11.25        0.008  0.994   6.2393
          Chemical: PHUnits=Water
            Thickness  PH   CEC
            150        6.5  12.6
            250        6.5  9.2
            250        6.5  6.7
            200        6.5  7.9
            300        6.5  5.8
            1850       6.5  5.8
            PH source: Estimated based on local knowledge
          Nutrient
          Solute NO3: InitialValuesUnits=ppm; WaterTableConcentration=0; D0=0; DepthConstant=0; MaxDepthSoluteAccessible=0; RunoffEffectivenessAtMovingSolute=0; MaxEffectiveRunoff=0
            Thickness  InitialValues  Exco  FIP
            150        6              0     1
            250        2              0     1
            250        1              0     1
            200        1              0     1
            300        1              0     1
            1850       1              0     1
          Solute NH4: InitialValuesUnits=ppm; WaterTableConcentration=0; D0=0; DepthConstant=0; MaxDepthSoluteAccessible=0; RunoffEffectivenessAtMovingSolute=0; MaxEffectiveRunoff=0
            Thickness  InitialValues  Exco  FIP
            150        1              1     1
            250        1              1     1
            250        1              1     1
            200        1              1     1
            300        1              1     1
            1850       1              1     1
          Solute Urea: InitialValuesUnits=kg/ha; WaterTableConcentration=0; D0=0; DepthConstant=0; MaxDepthSoluteAccessible=0; RunoffEffectivenessAtMovingSolute=0; MaxEffectiveRunoff=0
            Thickness  InitialValues  Exco  FIP
            150        0              0     1
            250        0              0     1
            250        0              0     1
            200        0              0     1
            300        0              0     1
            1850       0              0     1
          Water: Thickness=[150, 250, 250, 200, 300, 1850]; InitialValues=[0.411, 0.4, 0.375, 0.43, 0.378, 0.356]; FilledFromTop=false
          LayerStructure
            Thickness=[10, 20, 30, 40, 50, 50, 50, 50, 200, 250, 250, 500, 500, 500, 300, 100, 100]
          SoilTemperature Temperature
  Folder
    Soil Gley: same as Grazing.Sim.Field.Soil
    Soil Pallic: ASCOrder=Pallic; SoilType=Silt loam; LocalName=Templeton (Silt loam (Templeton, SH 73 No1406)); Site=SH 73, East of junction with Kirk Rd; NearestTown=Templeton, SH 73; Region=Canterbury; Country=New Zealand; NaturalVegetation=long term grass; ApsoilNumber=1406; Latitude=-43.53; Longitude=172.46; LocationAccuracy=+/-50 m; YearOfSampling=1981
      DataSource=The database of New Zealand soils was compiled by AgResearch (www.agresearch.co.nz) and based on soil properties gathered, mainly from publications, in the course of conducting several simulation-based research projects but particularly from the Pastoral 21 Environment program which was funded by the New Zealand Ministry for Business, Innovation and Employment,  Dairy NZ, Fonterra and Meat & Wool NZ.
      Comments=The data is a combination of published or supplied measurements, pedotransfer functions, and expert opinion. See Cichota et al. (2013; Soil Research 51: 92-111, http://dx.doi.org/10.1071/SR12338) for a description of the pedotransfer functions. The soil carbon and fresh organic matter settings have been set as those broadly appropriate for permanent productive pastoral systems, see Cichota el al. (2012; Soil Research 50: 694-707, http://dx.doi.org/10.1071/SR12208). Users should take care to adapt these to local conditions before using the data in simulations. FOM values estimated to be 900 kg/ha of FOM in top 600mm of soil and another 100 kg/ha below.
      Physical
        Thickness  ParticleSizeSand  ParticleSizeSilt  ParticleSizeClay  Rocks  BD     AirDry  LL15   DUL    SAT    KS
        160        4.848             69.812            25.34             0      1.22   0.058   0.176  0.414  0.484  797.61
        170        4.841             67.079            28.08             0      1.37   0.062   0.186  0.358  0.451  190.776
        180        3.848             68.272            27.88             0      1.645  0.068   0.205  0.333  0.356  45.956
        200        12.813            66.187            21                0      1.54   0.042   0.127  0.338  0.39   127.354
        390        8.818             67.212            23.97             0      1.67   0.053   0.161  0.335  0.347  50.698
        200        26.316            60.574            13.11             0      1.67   0.052   0.158  0.312  0.346  239.089
        1700       10.769            63.231            26                0      1.67   0.051   0.154  0.323  0.357  45.838
        BD source: Field measured and checked for sensibility
        AirDry source: Estimated based on local knowledge
        LL15, DUL source: Laboratory measured
        SAT source: Calculated from measured, estimated or calculated BD
        SoilCrop AGPRyegrassSoil: LL=[0.176, 0.186, 0.205, 0.127, 0.161, 0.158, 0.154]; KL=[0.06, 0.06, 0.06, 0.049, 0.04, 0.03, 0.02]; XF=[1, 1, 1, 1, 1, 1, 1]
          LL source: Estimated based on local knowledge
        SoilCrop AGPWhiteCloverSoil: same as Folder.Pallic.Physical.AGPRyegrassSoil
      Organic: FOMCNRatio=40; CarbonUnits=Total
        Thickness  Carbon  SoilCNRatio  FBiom  FInert  FOM
        160        3       35.294       0.078  0.454   83.7795
        170        1.1     35.294       0.025  0.563   59.6317
        180        0.4     35.294       0.008  0.83    41.6036
        200        0.3     35.294       0.008  0.937   27.8878
        390        0.2     35.294       0.008  0.967   12.7839
        200        0.2     35.294       0.008  0.99    8.56931
        200        0.2     35.294       0.008  0.992   5.74418
      Chemical: PHUnits=Water
        Thickness  PH   CEC
        160        6.5  14.8
        170        6.5  10.8
        180        6.5  11.3
        200        6.5  9.1
        390        6.5  10.8
        200        6.5  8.3
        200        6.5  10.8
        PH source: Estimated based on local knowledge
      Nutrient
      Swim3: Salb=0.13; CN2Bare=0; CNRed=0; CNCov=0.8; KDul=1; PSIDul=-100; VC=true; DTMin=0; DTMax=1400; MaxWaterIncrement=10; SpaceWeightingFactor=0; SoluteSpaceWeightingFactor=1; Dis=0; Disp=1; A=2; DTHC=0.1; DTHP=2; vcon1=7.28e-09; vcon2=7.26e-07; eo_time=06:00; eo_durn=720; default_rain_time=00:00; default_rain_duration=720; Diagnostics=false
      Water: Thickness=[160, 170, 180, 200, 390, 200, 1700]; InitialValues=[0.414, 0.358, 0.333, 0.338, 0.335, 0.312, 0.323]; FilledFromTop=false
      Solute NO3: InitialValuesUnits=ppm; WaterTableConcentration=0; D0=0; DepthConstant=0; MaxDepthSoluteAccessible=0; RunoffEffectivenessAtMovingSolute=0; MaxEffectiveRunoff=0
        Thickness  InitialValues  Exco  FIP
        160        6              0     1
        170        2              0     1
        180        1              0     1
        200        1              0     1
        390        1              0     1
        200        1              0     1
        1700       1              0     1
      Solute NH4: InitialValuesUnits=ppm; WaterTableConcentration=0; D0=0; DepthConstant=0; MaxDepthSoluteAccessible=0; RunoffEffectivenessAtMovingSolute=0; MaxEffectiveRunoff=0
        Thickness  InitialValues  Exco  FIP
        160        1              1     1
        170        1              1     1
        180        1              1     1
        200        1              1     1
        390        1              1     1
        200        1              1     1
        1700       1              1     1
      Solute Urea: InitialValuesUnits=kg/ha; WaterTableConcentration=0; D0=0; DepthConstant=0; MaxDepthSoluteAccessible=0; RunoffEffectivenessAtMovingSolute=0; MaxEffectiveRunoff=0
        Thickness  InitialValues  Exco  FIP
        160        0              0     1
        170        0              0     1
        180        0              0     1
        200        0              0     1
        390        0              0     1
        200        0              0     1
        1700       0              0     1
      LayerStructure
        Thickness=[10, 20, 30, 40, 50, 50, 50, 50, 200, 250, 250, 500, 500, 500, 300, 100, 100]
      SoilTemperature Temperature
    Soil Ultic: ASCOrder=Ultic; SoilType=Silt clay loam; LocalName=Wharekohe (Silt clay loam (Kaikohe No1351)); Site=DSIR Research Farm; NearestTown=Kaikohe; Region=Northland; Country=New Zealand; NaturalVegetation=long term grass; ApsoilNumber=1351; Latitude=-35.415; Longitude=173.818; LocationAccuracy=+/-50 m; YearOfSampling=1985
      ASCSubOrder=Decreased DUL by 0.02 in each layer to get a stable solution
      DataSource=The database of New Zealand soils was compiled by AgResearch (www.agresearch.co.nz) and based on soil properties gathered, mainly from publications, in the course of conducting several simulation-based research projects but particularly from the Pastoral 21 Environment program which was funded by the New Zealand Ministry for Business, Innovation and Employment,  Dairy NZ, Fonterra and Meat & Wool NZ.
      Comments=The data is a combination of published or supplied measurements, pedotransfer functions, and expert opinion. See Cichota et al. (2013; Soil Research 51: 92-111, http://dx.doi.org/10.1071/SR12338) for a description of the pedotransfer functions. The soil carbon and fresh organic matter settings have been set as those broadly appropriate for permanent productive pastoral systems, see Cichota el al. (2012; Soil Research 50: 694-707, http://dx.doi.org/10.1071/SR12208). Users should take care to adapt these to local conditions before using the data in simulations. FOM values estimated to be 900 kg/ha of FOM in top 600mm of soil and another 100 kg/ha below.
      Physical
        Thickness  ParticleSizeSand  ParticleSizeSilt  ParticleSizeClay  Rocks  BD     AirDry  LL15   DUL    SAT    KS
        100        2                 70                27                0      0.676  0.061   0.186  0.588  0.662  7353.595
        60         2                 73                23                0      1.006  0.06    0.182  0.507  0.561  305.216
        80         2                 73                23                0      1.171  0.059   0.18   0.466  0.51   14.541
        350        2                 73                23                0      1.335  0.058   0.177  0.425  0.459  10.544
        410        0.4               41                58.6              0      1.408  0.12    0.362  0.434  0.456  3.513
        2000       1                 32                67                0      1.4    0.119   0.36   0.434  0.457  3.513
        SoilCrop AGPRyegrassSoil: LL=[0.186, 0.177, 0.133, 0.384, 0.362, 0.36]; KL=[0.06, 0.06, 0.06, 0.06, 0.04, 0.028]; XF=[1, 1, 1, 1, 1, 1]
          LL source: Estimated based on local knowledge
        SoilCrop AGPWhiteCloverSoil: same as Folder.Ultic.Physical.AGPRyegrassSoil
      Organic: FOMCNRatio=40; CarbonUnits=Total
        Thickness  Carbon  SoilCNRatio  FBiom  FInert  FOM
        100        8       14.286       0.08   0.606   46.2374
        60         2.6     14.286       0.068  0.446   41.0089
        80         0.7     14.286       0.04   0.267   34.9455
        350        0.46    14.286       0.008  0.678   17.3534
        410        0.36    14.286       0.008  0.961   7.643
        2000       0.3     14.286       0.008  0.992   2.8117
      Chemical: PHUnits=Water
        Thickness  PH   CEC
        100        6.5  17.7
        60         6.5  6.8
        80         6.5  1.9
        350        6.5  16.7
        410        6.5  17.4
        2000       6.5  16
        PH source: Estimated based on local knowledge
      Nutrient
      Swim3: Salb=0.13; CN2Bare=0; CNRed=0; CNCov=0.8; KDul=1; PSIDul=-100; VC=true; DTMin=0; DTMax=1440; MaxWaterIncrement=10; SpaceWeightingFactor=0; SoluteSpaceWeightingFactor=1; Dis=0; Disp=1; A=2; DTHC=0.1; DTHP=2; vcon1=7.28e-09; vcon2=7.26e-07; eo_time=06:00; eo_durn=720; default_rain_time=00:00; default_rain_duration=720; Diagnostics=true
      Water: Thickness=[100, 60, 80, 350, 410, 2000]; InitialValues=[0.588, 0.507, 0.466, 0.425, 0.434, 0.434]; FilledFromTop=false
      Solute NO3: InitialValuesUnits=ppm; WaterTableConcentration=0; D0=0; DepthConstant=0; MaxDepthSoluteAccessible=0; RunoffEffectivenessAtMovingSolute=0; MaxEffectiveRunoff=0
        Thickness  InitialValues  Exco  FIP
        100        6              0     1
        60         2              0     1
        80         1              0     1
        350        1              0     1
        410        1              0     1
        2000       1              0     1
      Solute NH4: InitialValuesUnits=ppm; WaterTableConcentration=0; D0=0; DepthConstant=0; MaxDepthSoluteAccessible=0; RunoffEffectivenessAtMovingSolute=0; MaxEffectiveRunoff=0
        Thickness  InitialValues  Exco  FIP
        100        1              1     1
        60         1              1     1
        80         1              1     1
        350        1              1     1
        410        1              1     1
        2000       1              1     1
      Solute Urea: InitialValuesUnits=kg/ha; WaterTableConcentration=0; D0=0; DepthConstant=0; MaxDepthSoluteAccessible=0; RunoffEffectivenessAtMovingSolute=0; MaxEffectiveRunoff=0
        Thickness  InitialValues  Exco  FIP
        100        0              0     1
        60         0              0     1
        80         0              0     1
        350        0              0     1
        410        0              0     1
        2000       0              0     1
      LayerStructure
        Thickness=[10, 20, 30, 40, 50, 50, 50, 50, 200, 250, 250, 500, 500, 500, 300, 100, 100]
      SoilTemperature Temperature
  Experiment BasicFunctions
    Factors
      Permutation
        Factor Moisture: Specification=[Irrigate].Script.Amount = 5, 5.5, 6, 7, 10
    Simulation Base
      Clock: Start=2000-01-01; End=2000-10-31
      Weather: FileName=ConstantWeather.xlsx; ExcelWorkSheetName=Constant
      MicroClimate: a_interception=0; b_interception=1; c_interception=0; d_interception=0; SoilHeatFluxFraction=0.4; MinimumHeightDiffForNewLayer=0; NightInterceptionFraction=0.5; ReferenceHeight=2
      SoilArbitrator
      Forages: same as Grazing.Sim.Forages
      Summary
      Zone Field: Area=1; Slope=0; AspectAngle=0; Altitude=50
        SimpleGrazing: GrazingRotationType=0; SimpleGrazingFrequencyString=1; SimpleMinGrazable=0; SimpleGrazingResidual=2500; FlexibleGrazePostDM=0; IsCutAndCarry=false; FractionClippingsReturned=0; FractionIntakeNToAnimal=[0]; DungNConc=2.6; FractionOfDungUrineOffPaddock=[0.3]; DepthUrineIsAdded=150; ShowAdvancedExcretaOptions=false; SendDungElsewhere=0; SendUrineElsewhere=0; UsePatching=false; PseudoPatches=true; ZoneCount=25; UrineReturnPattern=2; PseudoRandomSeed=666; MaxEffectiveNConcentration=3.5; FractionPopulationDecline=0; TramplingOn=false; MaximumPropLitterMovedToSoil=0.1; PastureConsumedAtMaximumRateOfLitterRemoval=1200
          PreGrazeDMArray=[1000, 1000, 1000, 1000, 1000, 1000, 1000, 1000, 1000, 1000, 1000, 1000]
          PostGrazeDMArray=[2000, 2000, 2000, 2000, 2000, 2000, 2000, 2000, 2000, 2000, 2000, 2000]
        Manager TreadingDamage
          GrazingMode = False
          EachYear = False
          Dates = 15-mar-2000
          CowLiveweight = 450
          CowStockingDensityByMonth = 100, 100, 100, 100, 100, 300, 300, 100, 100, 100, 100, 100
          PressureMultiplier = -0.639471
          DamageRyegrass = True
          DamageClover = True
          DamageSoil = True
          Grass = [AGPRyegrass]
          RecoveryRateGrass = 0.015
          Clover = [AGPWhiteClover]
          RecoveryRateClover = 0.015
          DepthDamage100Soil = 100
          DepthDamage005Soil = 250
          RecoveryRateSoil = 0.015
          script: same as in Grazing.Sim.Field.TreadingDamage
        Manager FertiliseFixedDates (disabled)
          EachYear = True
          Dates = 5-jan, 15-jan, 25-jan, 5-feb, 15-feb, 25-feb, 5-mar, 15-mar, 25-mar, 5-apr, 15-apr, 25-apr, 5-may, 15-may, 25-may
          UseCritNThreshold = False
          CritNThreshold = 50
          CritNDepth = 75
          Depth = 50
          Amount = 15
          FertiliserType = UreaN
          script: same as in Grazing.Sim.Field.FertiliseFixedDates
        Manager Fertilise on event
          Amount = 10
          FertiliseDepth = 0
          FertiliserType = UreaN
```csharp
using Models.Soils;
using System;
using Models.Functions;
using Models.Core;
using Models.PMF;
using APSIM.Shared.Utilities;
using System.Diagnostics;
namespace Models
{
    [Serializable]
    public class Script : Model
    {
        [Link] Clock clock;
        [Link] Fertiliser fertiliser;
        [Link] Zone zone;
       
                 
        [Description("Amount of fertiliser to be applied (kg /ha)")] 
        public double Amount { get; set; }  
        
        [Description("Fertilise depth (mm)")]
        public double FertiliseDepth { get; set; }
               
        [Description("Type of fertiliser to apply? ")] 
        [Display(Type = DisplayType.FertiliserType)]public string FertiliserType { get; set; }   
               
        [EventSubscribe("DoManagement")]
        private void OnDoManagement(object sender, EventArgs e)
        {
           fertiliser.Apply(amount: Amount, type: FertiliserType, depth: FertiliseDepth);
        }
    }
}
```
        Manager Irrigate
          Amount = 7.5
```csharp
using Models.Soils;
using System;
using System.Linq;
using Models.Core;
using Models.PMF;
using APSIM.Shared.Utilities;
using APSIM.Numerics;

namespace Models
{
    [Serializable]
    public class Script : Model
    {
        [Link] Clock clock;
        [Link] Irrigation irrigation;
        
        [Separator("A component to apply irrigation on one or more dates on every year of the simulation")]

        [Description("Amount of irrigation to be applied (mm)")] 
        public double Amount { get; set; }
        
        public int DaysSinceIrrigated;
        
        [EventSubscribe("DoManagement")]
        private void OnDoManagement(object sender, EventArgs e)
        {
            irrigation.Apply(amount: Amount, depth: 0.0, efficiency: 1.0, willRunoff: false);
        }
    }
}
```
        Irrigation
        Fertiliser
        SurfaceOrganicMatter: InitialResidueName=Sward; InitialResidueType=grass; InitialResidueMass=1000; InitialStandingFraction=0; InitialCPR=0; InitialCNR=15
        PastureSpecies AGPRyegrass: same as Grazing.Sim.Field.AGPRyegrass
        PastureSpecies AGPWhiteClover: same as Grazing.Sim.Field.AGPWhiteClover
        Report: EventNames=Clock.Today >= new DateTime(2000, 3, 1)
          VariableNames:
            [Clock].Today as Date
            [AGPRyegrass].NetGrowthWt + [AGPWhiteClover].NetGrowthWt as NetGrowthWt
            [AGPRyegrass].HarvestedWt + [AGPWhiteClover].HarvestedWt as HarvestedWt
            [AGPRyegrass].AboveGroundWt + [AGPWhiteClover].AboveGroundWt as AboveGroundWt
            [Irrigation].IrrigationApplied as IrrigationApplied
            [Soil].Water.Volumetric[1] as Theta0
            [Physical].DUL[1] as Dul0
            [Physical].SAT[1] as Sat0
            [TreadingDamage].Script.WaterFactor as WaterFactor
            [TreadingDamage].Script.WaterFactor as WaterFactor
            [TreadingDamage].Script.GrazingPressure as GrazingPressure
            [TreadingDamage].Script.EffectiveGrazingPressure as EffectiveGrazingPressure
        Soil: same as Grazing.Sim.Field.Soil
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