Simulations
  Simulation Wheat: Area=0; Slope=0
    Clock: StartDate=1900-01-01; EndDate=2000-12-31
    Summary SummaryFile
    WeatherFile: FileName=%root%\Examples\WeatherFiles\Dalby.met
    Zone Field: Area=1; Slope=0
      Report: EventNames=[Wheat].Harvesting
        VariableNames:
          [Clock].Today
          Wheat.Zadok.Stage
          Wheat.Phenology.CurrentStageName
          Wheat.AboveGround.Wt
          Wheat.AboveGround.N
          Wheat.Grain.Yield
          Wheat.Grain.Protein
          Wheat.Grain.Size
          Wheat.Grain.GrainNo
          Wheat.Grain.Wt
          Wheat.Grain.N
          Wheat.Total.Wt
      Fertiliser
      Soil: ASCOrder=Vertosol; ASCSubOrder=Black; SoilType=Clay; Site=Norwin; NearestTown=Norwin; Region=Darling Downs and Granite Belt; State=Queensland; Country=Australia; NaturalVegetation=Qld. Bluegrass, possible Qld. Blue gum; ApsoilNumber=900; Latitude=-27.581836; Longitude=151.320206; LocationAccuracy=+/- 20m
        DataSource=CSIRO Sustainable Ecosystems, Toowoomba; Characteriesd as part of the GRDC funded project"Doing it better, doing it smarter, managing soil water in Australian agriculture' 2011
        Comments=OC, CLL for all crops estimated-based on Bongeen Mywybilla Soil No1
        Water
          Thickness  BD       AirDry    LL15      DUL       SAT       KS
          150        1.01056  0.13025   0.2605    0.521     0.588655  20
          150        1.07146  0.198689  0.248362  0.496723  0.565677  20
          300        1.09394  0.28      0.28      0.488438  0.557193  20
          300        1.15861  0.28      0.28      0.480297  0.532787  20
          300        1.17301  0.28      0.28      0.471584  0.527354  20
          300        1.16287  0.28      0.28      0.457071  0.53118   20
          300        1.1875   0.28      0.28      0.452332  0.521888  20
          SoilCrop WheatSoil: LL=[0.261, 0.248, 0.28, 0.306, 0.36, 0.392, 0.446]; KL=[0.06, 0.06, 0.06, 0.04, 0.04, 0.02, 0.01]; XF=[1, 1, 1, 1, 1, 1, 1]
        SoilWater: min_crit_temp=5; max_crit_temp=35; max_albedo=0.23; A_to_evap_fact=0.44; canopy_eos_coef=1.7; sw_top_crit=0.9; sumes1_max=100; sumes2_max=25; solute_flow_eff=[1]; solute_flux_eff=[1]; gravity_gradient=2E-05; specific_bd=2.65; hydrol_effective_depth=450; immobile_solutes=[NH4]; canopy_fact=[1, 1, 0, 0]; canopy_fact_height=[0, 600, 1800, 30000]; canopy_fact_default=0.5; act_evap_method=ritchie; irrigation_will_runoff=false; irrigation_layer=0; max_pond=0; SummerCona=5; SummerU=5; SummerDate=1-Nov; WinterCona=5; WinterU=5; WinterDate=1-Apr; DiffusConst=40; DiffusSlope=16; Salb=0.12; CN2Bare=73; CNRed=20; CNCov=0.8; Thickness=[150, 150, 300, 300, 300, 300, 300]; SWCON=[0.3, 0.3, 0.3, 0.3, 0.3, 0.3, 0.3]
          mobile_solutes=[NO3, urea, cl, br, org_n, org_c_pool1, org_c_pool2, org_c_pool3]
        SoilNitrogen: fom_type=[default, manure, mucuna, lablab, shemp, stable]; fract_carb=[0.2, 0.3, 0.54, 0.57, 0.45, 0]; fract_cell=[0.7, 0.3, 0.37, 0.37, 0.47, 0.1]; fract_lign=[0.1, 0.4, 0.09, 0.06, 0.08, 0.9]; wfpsN2N2O_x=[22, 88]; wfpsN2N2O_y=[0.1, 1]
        SoilOrganicMatter: RootCN=40; RootWt=1000; SoilCN=12; EnrACoeff=7.4; EnrBCoeff=0.2; OCUnits=Total
          Thickness  OC    FBiom  FInert
          150        1.2   0.04   0.4
          150        0.96  0.02   0.6
          300        0.6   0.02   0.8
          300        0.3   0.02   1
          300        0.18  0.01   1
          300        0.12  0.01   1
          300        0.12  0.01   1
        Analysis: Thickness=[150, 150, 300, 300, 300, 300, 300]; PH=[8, 8, 8, 8, 8, 8, 8]; PHUnits=Water; BoronUnits=HotWater
        InitialWater: PercentMethod=EvenlyDistributed; FractionFull=1
        Sample InitialN: NO3Units=ppm; NH4Units=ppm; SWUnits=Volumetric; OCUnits=Total; PHUnits=Water
          Thickness  NO3  NH4
          150        1    0.1
          150        1    0.1
          300        1    0.1
          300        1    0.1
          300        1    0.1
          300        1    0.1
          300        1    0.1
      SurfaceOrganicMatter: PoolName=wheat_stubble; type=wheat; mass=500; standing_fraction=0; cnr=100; CriticalResidueWeight=2000; OptimumDecompTemp=20; MaxCumulativeEOS=20; CNRatioDecompCoeff=0.277; CNRatioDecompThreshold=25; TotalLeachRain=25; MinRainToLeach=10; CriticalMinimumOrganicC=0.004; DefaultCPRatio=0; DefaultStandingFraction=0; StandingExtinctCoeff=0.5; FractionFaecesAdded=0.5
        Pools:
          {PoolName=wheat_stubble, ResidueType=wheat, Mass=500, CNRatio=100, StandingFraction=0}
        ResidueTypes: LoadFromResource=ResidueTypes
      Plant15 Wheat: AutoHarvest=true; CropType=Wheat
      MicroClimate: air_pressure=1010; soil_emissivity=0.96; sun_angle=15; soil_heat_flux_fraction=0.4; night_interception_fraction=0.5; windspeed_default=3; refheight=2; albedo=0.15; emissivity=0.96; gsmax=0.01; r50=200; a_interception=0; b_interception=1; c_interception=0; d_interception=0; soil_albedo=0.3
      Manager SowingFertiliser
        Amount = 160
        CropName = wheat
```csharp
using System;
using Models.Core;
using Models.PMF;
namespace Models
{
	[Serializable]
	public class Script : Model
	{
		[Link] Clock Clock;
		[Link] Fertiliser Fertiliser;
		[Link] Summary Summary;
		
		
		[Description("Amount of fertiliser to be applied (kg/ha)")]
		public double Amount { get; set;}
		
		[Description("Crop to be fertilised")]
		public string CropName { get; set;}
		
		
		

		[EventSubscribe("Sowing")]
		private void OnSowing(object sender, EventArgs e)
		{
			Model crop = sender as Model;
			if (crop.Name.ToLower()==CropName.ToLower())
				Fertiliser.Apply(Amount: Amount, Type: Fertiliser.Types.NO3N);
		}
		
	}
}
```
      Manager SowingRule
        StartDate = 1-may
        EndDate = 10-jul
        MinESW = 100
        MinRain = 25
        RainDays = 7
        CultivarName = Hartog
        SowingDepth = 30
        RowSpacing = 250
        Population = 120
```csharp
using System;
using Models.Core;
using Models.PMF.OldPlant;
using Models.Soils;

namespace Models
{
	[Serializable]
	public class Script : Model
	{
		[Link] Clock Clock;
		[Link] Fertiliser Fertiliser;
		[Link] Summary Summary;
		[Link] Plant15 Wheat;
		[Link] Soil Soil; 
		Utility.Accumulator accumulatedRain;
		
		[Description("Start of sowing window (d-mmm)")]
		public string StartDate { get; set;}
		[Description("End of sowing window (d-mmm)")]
		public string EndDate { get; set;}
		[Description("Minimum extractable soil water for sowing (mm)")]
		public double MinESW { get; set;}
		[Description("Accumulated rainfall required for sowing (mm)")]
		public double MinRain { get; set;}
		[Description("Duration of rainfall accumulation (d)")]
		public int RainDays { get; set;}
		[Description("Cultivar to be sown")]
		public string CultivarName { get; set;}
		[Description("Sowing depth (mm)")]
		public double SowingDepth { get; set;}		
		[Description("Row spacing (mm)")]
		public double RowSpacing { get; set;}	
		[Description("Plant population (/m2)")]
		public double Population { get; set;}	
		
		
		[EventSubscribe("Commencing")]
        private void OnSimulationCommencing(object sender, EventArgs e)
        {
        	accumulatedRain = new Utility.Accumulator(this, "[WeatherFile].Rain", RainDays);
        }
		

		[EventSubscribe("DoManagement")]
		private void OnDoManagement(object sender, EventArgs e)
		{
			accumulatedRain.Update();
			
			if (Utility.Date.WithinDates(StartDate,Clock.Today,EndDate) &&
			    Wheat.plant_status=="out" &&
			    Soil.SoilWater.esw > MinESW &&
			    accumulatedRain.Sum > MinRain)
			{
			   Wheat.Sow(population:Population, cultivar:CultivarName, depth:SowingDepth, rowSpacing:RowSpacing);	
			}
		
		}
		
	}
}
```
  DataStore
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