Simulations: Version=2
  DataStore
  Simulation Test1: Area=0; Slope=0
    Clock: StartDate=2000-07-01; EndDate=2001-06-30
    Weather: FileName=%root%\Tests\WeatherFiles\Ruakura.met
    Manager SetCO2
      ambientCO2 = 380
```csharp
using System;
using Models.Core;
using Models.PMF;
namespace Models
{
	[Serializable]
	public class Script : Model
	{      
	[Link] Weather MetData;
	[Link] Clock Clock;
	
	[Description("Ambient CO2 concentration (ppm):")]
	public double ambientCO2 {get; set;} //= 350;
	
    [EventSubscribe("Commencing")]
    private void OnSimulationCommencing(object sender, EventArgs e)
	{
		MetData.CO2 = ambientCO2;
	}
	}
}
```
    Summary
    Zone Field: Area=0; Slope=0
      Manager CutRotation
        CutRotationDate = 1900-01-01
        CutInterval = 21
        PastureAmount = 1500
```csharp
using System;
using Models.Core;
using Models.PMF;
namespace Models
{
	[Serializable]
	public class Script : Model
	{
		[Link] Clock Clock;
		[Link] AgPastureProto AgPasture;
		
		[Description("Date to begin rotation:")]
		public DateTime CutRotationDate { get; set; }
		[Description("Rotation interval (days):")]
		public int CutInterval { get; set; }
		//= 500;
		[Description("Residual amount of pasture (kg/ha):")]
		public double PastureAmount { get; set; }
		//= 500;
		
		private bool RotationAllowed = false;
		private int DaysAfterCut { get; set; }
		
		[EventSubscribe("Commencing")]
		private void OnSimulationCommencing(object sender, EventArgs e)
		{
			DaysAfterCut = 1000;
		}
		
		[EventSubscribe("DoManagement")]
		private void OnDoManagement(object sender, EventArgs e)
		{
			if (Clock.Today.Date >= CutRotationDate)
			{
				if (DaysAfterCut >= CutInterval)
				{
					AgPasture.Graze(type: "SetResidueAmount", amount: PastureAmount);
					DaysAfterCut = 0;
				}
				else
				{
					DaysAfterCut += 1;
				}
			}
		}
	}
}
```
      MicroClimate: a_interception=0; b_interception=0; c_interception=0; d_interception=0; soil_albedo=0.23; air_pressure=1010; soil_emissivity=0.96; sun_angle=15; soil_heat_flux_fraction=0.4; night_interception_fraction=0.5; windspeed_default=3; refheight=2; albedo=0.293662; emissivity=0.96; gsmax=0.01; r50=200
      Irrigation
      Fertiliser
      SurfaceOrganicMatter: ReportAdditions=no; ReportRemovals=no; PoolName=AgPasture; type=grass; mass=1000; standing_fraction=0; cnr=40; CriticalResidueWeight=2000; OptimumDecompTemp=20; MaxCumulativeEOS=20; CNRatioDecompCoeff=0.277; CNRatioDecompThreshold=25; TotalLeachRain=25; MinRainToLeach=10; CriticalMinimumOrganicC=0.004; DefaultCPRatio=0; DefaultStandingFraction=0; StandingExtinctCoeff=0.5; FractionFaecesAdded=0.5
        Pools:
          {PoolName=AgPasture, ResidueType=grass, Mass=1000, CNRatio=40, StandingFraction=0}
        ResidueTypes: LoadFromResource=ResidueTypes
        TillageTypes TillageTypesList
      Soil: SoilType=NZ_Sedimentary; Site=Winchmore; NearestTown=Ashburton; Region=Canterbury; Country=New Zealand; Latitude=-48.48; Longitude=0
        Analysis: Thickness=[150, 150, 200, 150, 250, 300, 300]; PH=[5.9, 5.9, 5.9, 5.9, 5.9, 5.9, 5.9]; PHUnits=Water; BoronUnits=HotWater
        Water
          Thickness  BD    AirDry  LL15   DUL    SAT    KS
          150        1.3   0.075   0.15   0.36   0.45   5000
          150        1.33  0.12    0.133  0.33   0.428  5000
          200        1.01  0.075   0.075  0.24   0.3    5000
          150        0.54  0.02    0.02   0.08   0.172  10000
          250        0.31  0.01    0.01   0.035  0.11   17500
          300        0.31  0.01    0.01   0.03   0.11   20000
          300        0.31  0.01    0.01   0.03   0.11   20000
          SoilCrop ryegrass_cloverSoil: LL=[0.15, 0.13, 0.08, 0.02, 0.01, 0.01, 0.01]; KL=[0.08, 0.08, 0.07, 0.04, 0.01, 0, 0]; XF=[1, 1, 1, 1, 1, 0, 0]
          SoilCrop agpastureSoil: LL=[0.15, 0.13, 0.08, 0.02, 0.01, 0.01, 0.01]; KL=[0.08, 0.08, 0.07, 0.04, 0.01, 0, 0]; XF=[1, 1, 1, 1, 1, 0, 0]
          SoilCrop ryegrassSoil: LL=[0.15, 0.13, 0.08, 0.02, 0.01, 0.01, 0.01]; KL=[0.1, 0.1, 0.1, 0.02, 0, 0, 0]; XF=[1, 1, 1, 1, 0, 0, 0]
          SoilCrop cloverSoil: LL=[0.15, 0.13, 0.08, 0.02, 0.01, 0.01, 0.01]; KL=[0.1, 0.1, 0.1, 0.02, 0, 0, 0]; XF=[1, 1, 1, 1, 0, 0, 0]
          SoilCrop maizeSoil: LL=[0.15, 0.13, 0.08, 0.02, 0.01, 0.01, 0.01]; KL=[0.06, 0.06, 0.06, 0.06, 0.06, 0.06, 0.06]; XF=[1, 1, 1, 1, 1, 1, 1]
          SoilCrop cottonSoil: LL=[0.14, 0.14, 0.03, 0.02, 0.02, 0.02, 0.02]; KL=[0.1, 0.1, 0.1, 0.1, 0.09, 0.07, 0.05]; XF=[1, 1, 1, 1, 1, 1, 1]
          SoilCrop sorghumSoil: LL=[0.14, 0.14, 0.03, 0.02, 0.02, 0.02, 0.02]; KL=[0.07, 0.07, 0.07, 0.05, 0.05, 0.04, 0.03]; XF=[1, 1, 1, 1, 1, 1, 0.9]
          SoilCrop slurpSoil: LL=[0.14, 0.14, 0.03, 0.02, 0.02, 0.02, 0.02]; KL=[0.06, 0.06, 0.06, 0.06, 0.06, 0.06, 0.06]; XF=[1, 1, 1, 1, 1, 1, 1]
        SoilWater: SummerDate=1-Nov; SummerU=6; SummerCona=3.5; WinterDate=1-apr; WinterU=2; WinterCona=2; DiffusConst=88; DiffusSlope=35; Salb=0.13; CN2Bare=73; CNRed=20; CNCov=0.8; slope=0; discharge_width=0; catchment_area=0; max_pond=0; residueinterception=0
          Thickness  SWCON  KLAT
          150        0.5    0
          150        0.52   0
          200        0.55   0
          150        0.6    0
          250        0.65   0
          300        0.65   0
          300        0.65   0
        SoilNitrogen: fom_type=[default, manure, mucuna, lablab, shemp, stable]; fract_carb=[0.2, 0.3, 0.54, 0.57, 0.45, 0]; fract_cell=[0.7, 0.3, 0.37, 0.37, 0.47, 0.1]; fract_lign=[0.1, 0.4, 0.09, 0.06, 0.08, 0.9]; wfpsN2N2O_x=[22, 88]; wfpsN2N2O_y=[0.1, 1]
          oc=[3.70769, 2.46858, 1.23789, 0.498246, 0.250185, 0.150347, 0.100196]
        SoilOrganicMatter: RootCN=40; RootWt=800; SoilCN=11.3; EnrACoeff=7.4; EnrBCoeff=0.2; OCUnits=Total
          Thickness  OC    FBiom  FInert
          150        3.8   0.04   0.3
          150        2.5   0.02   0.5
          200        1.25  0.02   0.6
          150        0.5   0.01   0.8
          250        0.25  0.01   1
          300        0.15  0      1
          300        0.1   0      1
        InitialWater Initial water: PercentMethod=EvenlyDistributed; FractionFull=0.99
        Sample Initial nitrogen: NO3Units=ppm; NH4Units=ppm; SWUnits=Volumetric; OCUnits=Total; PHUnits=Water
          Thickness  NO3      NH4
          150        7.61905  0.1
          150        7.27008  0.1
          200        3.87147  0.1
          150        3.84025  0.1
          250        2.1      0.1
          300        1.2      0.1
          300        1.2      0.1
          999999     -        -
      AgPastureProto AgPasture: alt_N_uptake=no; SwardName=AgPasture; NumSpecies=1; WaterUptakeSource=calc; SpeciesName=[Ryegrass]; SpeciesNType=[grass]; SpeciesCType=[C3]; InitialDMShoot=[2000]; InitialDMRoot=[500]; InitialRootDepth=[750]; MinimumGreenWt=[300]; ExpoLinearDepthParam=0.1; ExpoLinearCurveParam=3
      Report Rep01sward: EventNames=[Clock].DoReport
        VariableNames:
          [Clock].Today
          AgPasture.Name
          AgPasture.SwardName
          AgPasture.PlantStatus
          AgPasture.Stage
          AgPasture.StageName
          AgPasture.TotalPlantC
          AgPasture.TotalPlantWt
          AgPasture.AboveGroundWt
          AgPasture.AboveGroundLiveWt
          AgPasture.AboveGroundDeadWt
          AgPasture.BelowGroundWt
          AgPasture.StandingPlantWt
          AgPasture.LeafWt
          AgPasture.LeafLiveWt
          AgPasture.LeafDeadWt
          AgPasture.StemWt
          AgPasture.StemLiveWt
          AgPasture.StemDeadWt
          AgPasture.StolonWt
          AgPasture.RootWt
          AgPasture.PlantGrossPotentialGrowthWt
          AgPasture.PlantPotentialGrowthWt
          AgPasture.PlantGrowthNoNLimit
          AgPasture.PlantGrowthWt
          AgPasture.PlantEffectiveGrowthWt
          AgPasture.HerbageGrowthWt
          AgPasture.LitterDepositionWt
          AgPasture.RootSenescenceWt
          AgPasture.TotalPlantN
          AgPasture.AboveGroundN
          AgPasture.AboveGroundLiveN
          AgPasture.AboveGroundDeadN
          AgPasture.BelowGroundN
          AgPasture.StandingPlantN
          AgPasture.LeafN
          AgPasture.StemN
          AgPasture.StolonN
          AgPasture.RootN
          AgPasture.StandingPlantNConc
          AgPasture.LeafNConc
          AgPasture.StemNConc
          AgPasture.StolonNConc
          AgPasture.RootNConc
          AgPasture.PlantGrowthNconc
          AgPasture.PlantRemobilisableSenescedN
          AgPasture.PlantRemobilisedN
          AgPasture.PlantRemobilisableLuxuryN
          AgPasture.PlantLuxuryNRemobilised
          AgPasture.PlantFixedN
          AgPasture.NitrogenRequiredLuxury
          AgPasture.NitrogenRequiredOptimum
          AgPasture.NitrogenDemand
          AgPasture.NitrogenSupply
          AgPasture.NitrogenUptake
          AgPasture.LitterDepositionN
          AgPasture.RootSenescenceN
          AgPasture.PlantGrowthN
          AgPasture.DMToShoot
          AgPasture.DMToRoots
          AgPasture.FractionGrowthToRoot
          AgPasture.LAI_total
          AgPasture.LAI_green
          AgPasture.LAI_dead
          AgPasture.Cover_tot
          AgPasture.Cover_green
          AgPasture.Cover_dead
          AgPasture.Height
          AgPasture.WaterDemand
          AgPasture.WaterSupply
          AgPasture.WaterUptake
          AgPasture.GLFtemp
          AgPasture.GLFwater
          AgPasture.GLFnConcentration
          AgPasture.GLFn
          AgPasture.GLFrgr
          AgPasture.HarvestableWt
          AgPasture.HarvestWt
          AgPasture.HarvestN
          AgPasture.HerbageDigestibility
          AgPasture.DefoliatedDigestibility
          AgPasture.HerbageME
          AgPasture.GPP
          AgPasture.NPP
          AgPasture.NAPP
      Report Rep02ryegrass: EventNames=[Clock].EndOfDay
        VariableNames:
          [Clock].Today
          AgPasture.SpeciesName[1]
          AgPasture.SpeciesNType[1]
          AgPasture.SpeciesTotalWt[1]
          AgPasture.SpeciesAboveGroundWt[1]
          AgPasture.SpeciesBelowGroundWt[1]
          AgPasture.SpeciesStandingWt[1]
          AgPasture.SpeciesStandingLiveWt[1]
          AgPasture.SpeciesStandingDeadWt[1]
          AgPasture.SpeciesLeafWt[1]
          AgPasture.SpeciesStemWt[1]
          AgPasture.SpeciesStolonWt[1]
          AgPasture.SpeciesRootWt[1]
          AgPasture.SpeciesLeafStage1Wt[1]
          AgPasture.SpeciesLeafStage2Wt[1]
          AgPasture.SpeciesLeafStage3Wt[1]
          AgPasture.SpeciesLeafStage4Wt[1]
          AgPasture.SpeciesStemStage1Wt[1]
          AgPasture.SpeciesStemStage2Wt[1]
          AgPasture.SpeciesStemStage3Wt[1]
          AgPasture.SpeciesStemStage4Wt[1]
          AgPasture.SpeciesStolonStage1Wt[1]
          AgPasture.SpeciesStolonStage2Wt[1]
          AgPasture.SpeciesStolonStage3Wt[1]
          AgPasture.SpeciesPotCarbonAssimilation[1]
          AgPasture.SpeciesCarbonLossRespiration[1]
          AgPasture.SpeciesGrossPotGrowth[1]
          AgPasture.SpeciesNetPotGrowth[1]
          AgPasture.SpeciesPotGrowthW[1]
          AgPasture.SpeciesGrowthWt[1]
          AgPasture.SpeciesLitterWt[1]
          AgPasture.SpeciesRootSenescedWt[1]
          AgPasture.SpeciesTotalN[1]
          AgPasture.SpeciesStandingN[1]
          AgPasture.SpeciesLeafN[1]
          AgPasture.SpeciesStemN[1]
          AgPasture.SpeciesStolonN[1]
          AgPasture.SpeciesRootsN[1]
          AgPasture.SpeciesLeafStage1N[1]
          AgPasture.SpeciesLeafStage2N[1]
          AgPasture.SpeciesLeafStage3N[1]
          AgPasture.SpeciesLeafStage4N[1]
          AgPasture.SpeciesStemStage1N[1]
          AgPasture.SpeciesStemStage2N[1]
          AgPasture.SpeciesStemStage3N[1]
          AgPasture.SpeciesStemStage4N[1]
          AgPasture.SpeciesStolonStage1N[1]
          AgPasture.SpeciesStolonStage2N[1]
          AgPasture.SpeciesStolonStage3N[1]
          AgPasture.SpeciesLeafNConc[1]
          AgPasture.SpeciesStemNConc[1]
          AgPasture.SpeciesStolonNConc[1]
          AgPasture.SpeciesRootNConc[1]
          AgPasture.SpeciesLeafStage1NConc[1]
          AgPasture.SpeciesLeafStage2NConc[1]
          AgPasture.SpeciesLeafStage3NConc[1]
          AgPasture.SpeciesLeafStage4NConc[1]
          AgPasture.SpeciesStemStage1NConc[1]
          AgPasture.SpeciesStemStage2NConc[1]
          AgPasture.SpeciesStemStage3NConc[1]
          AgPasture.SpeciesStemStage4NConc[1]
          AgPasture.SpeciesStolonStage1NConc[1]
          AgPasture.SpeciesStolonStage2NConc[1]
          AgPasture.SpeciesStolonStage3NConc[1]
          AgPasture.SpeciesRemobilisableSenescedN[1]
          AgPasture.SpeciesSenescedNRemobilised[1]
          AgPasture.SpeciesRemobilisableLuxuryN[1]
          AgPasture.SpeciesLuxuryNRemobilised[1]
          AgPasture.SpeciesFixedN[1]
          AgPasture.SpeciesRequiredNLuxury[1]
          AgPasture.SpeciesRequiredNOptimum[1]
          AgPasture.SpeciesDemandN[1]
          AgPasture.SpeciesUptakeN[1]
          AgPasture.SpeciesLitterN[1]
          AgPasture.SpeciesSenescedN[1]
          AgPasture.SpeciesGrowthN[1]
          AgPasture.SpeciesGrowthNconc[1]
          AgPasture.SpeciesLiveDMTurnoverRate[1]
          AgPasture.SpeciesDeadDMTurnoverRate[1]
          AgPasture.SpeciesStolonDMTurnoverRate[1]
          AgPasture.SpeciesRootDMTurnoverRate[1]
          AgPasture.SpeciesTotalLAI[1]
          AgPasture.SpeciesGreenLAI[1]
          AgPasture.SpeciesDeadLAI[1]
          AgPasture.SpeciesGLFT[1]
          AgPasture.SpeciesGLFW[1]
          AgPasture.SpeciesGLFN[1]
          AgPasture.SpeciesHarvestableWt[1]
          AgPasture.SpeciesHarvestWt[1]
          AgPasture.SpeciesHarvestFraction[1]
          AgPasture.SpeciesHarvestN[1]
      Report Rep03layers: EventNames=[Clock].EndOfDay
        VariableNames:
          [Clock].Today
          AgPasture.SwardName
          [Soil].Thickness
          AgPasture.RootWtFraction
          AgPasture.Rlv
          AgPasture.NitrogenSupplyLayers
          AgPasture.NitrogenUptakeLayers
          AgPasture.WaterSupplyLayers
          AgPasture.WaterUptakeLayers
      Report Rep04massbalance: EventNames=[Clock].EndOfDay
        VariableNames:
          [Clock].Today
          AgPasture.SwardName
          AgPasture.TotalPlantN
          sum([Soil].NO3N) as TotalNO3
          sum([Soil].NH4N) as TotalNH4
          sum([Soil].SoilNitrogen.HumicN) as TotalHumusN
          sum([Soil].SoilNitrogen.MicrobialN) as TotalBiomN
          sum([Soil].SoilNitrogen.FOMN) as TotalFomN
          [SurfaceOrganicMatter].N
          Fertiliser.NitrogenApplied
          AgPasture.PlantFixedN
          AgPasture.HarvestN
          sum([Soil].SoilNitrogen.Denitrification) as Denitrification
          [Soil].SoilWater.LeachNO3
          AgPasture.NitrogenUptake
          AgPasture.PlantRemobilisableSenescedN
          AgPasture.PlantRemobilisedN
          AgPasture.PlantLuxuryNRemobilised
          AgPasture.PlantGrowthN
          AgPasture.LitterDepositionN
          AgPasture.RootSenescenceN
  Simulation Test2: Area=0; Slope=0
    Clock: StartDate=2000-07-01; EndDate=2002-06-30
    Weather: FileName=%root%\Tests\WeatherFiles\Ruakura.met
    Manager SetCO2: same as Test1.SetCO2
    Summary
    Zone Field: Area=0; Slope=0
      Manager CutRotation
        CutRotationStartDate = 0001-01-01
        CutInterval = 21
        PastureAmount = 1500
```csharp
using System;
using Models.Core;
using Models.PMF;
namespace Models
{
	[Serializable]
	public class Script : Model
	{
		[Link] Clock Clock;
		[Link] AgPasture.SwardProto Sward;
		
		[Description("Date to begin rotation:")]
		public DateTime CutRotationStartDate { get; set; }
		[Description("Rotation interval (days):")]
		public int CutInterval { get; set; }
		[Description("Residual amount of pasture (kg/ha):")]
		public double PastureAmount { get; set; }
		
		private bool RotationAllowed = true;
		private int DaysAfterCut { get; set; }
		
		[EventSubscribe("Commencing")]
		private void OnSimulationCommencing(object sender, EventArgs e)
		{
			DaysAfterCut = 1000;
		}
		
		[EventSubscribe("DoManagement")]
		private void OnDoManagement(object sender, EventArgs e)
		{
			if (RotationAllowed)
			{
				if (Clock.Today.Date >= CutRotationStartDate.Date)
				{
					if (DaysAfterCut >= CutInterval)
					{
						Sward.Harvest(type: "SetResidueAmount", amount: PastureAmount);
						DaysAfterCut = 0;
					}
					else
					{
						DaysAfterCut += 1;
					}
				}
			}
		}
	}
}
```
      MicroClimate: same as Test1.Field.MicroClimate
      Irrigation
      Fertiliser
      SurfaceOrganicMatter: ReportAdditions=no; ReportRemovals=no; PoolName=Sward; type=grass; mass=1000; standing_fraction=0; cnr=40; CriticalResidueWeight=2000; OptimumDecompTemp=20; MaxCumulativeEOS=20; CNRatioDecompCoeff=0.277; CNRatioDecompThreshold=25; TotalLeachRain=25; MinRainToLeach=10; CriticalMinimumOrganicC=0.004; DefaultCPRatio=0; DefaultStandingFraction=0; StandingExtinctCoeff=0.5; FractionFaecesAdded=0.5
        Pools:
          {PoolName=Sward, ResidueType=grass, Mass=1000, CNRatio=40, StandingFraction=0}
        ResidueTypes: LoadFromResource=ResidueTypes
        TillageTypes TillageTypesList
      Soil: SoilType=NZ_Sedimentary; Site=Winchmore; NearestTown=Ashburton; Region=Canterbury; Country=New Zealand; Latitude=-48.48; Longitude=0
        Analysis: same as Test1.Field.Soil.Analysis
        Water
          Thickness  BD    AirDry  LL15   DUL   SAT    KS
          150        1.3   0.075   0.15   0.36  0.45   5000
          150        1.33  0.12    0.133  0.33  0.428  5000
          200        1.01  0.075   0.075  0.24  0.3    5000
          150        0.54  0.02    0.02   0.08  0.172  10000
          250        0.31  0.01    0.01   0.04  0.11   17500
          300        0.31  0.01    0.01   0.03  0.11   20000
          300        0.31  0.01    0.01   0.03  0.11   20000
          SoilCrop ryegrass_clover: LL=[0.15, 0.13, 0.08, 0.02, 0.01, 0.01, 0.01]; KL=[0.08, 0.08, 0.07, 0.04, 0.01, 0, 0]; XF=[1, 1, 1, 1, 1, 0, 0]
          SoilCrop SwardSoil: LL=[0.15, 0.13, 0.08, 0.02, 0.01, 0.01, 0.01]; KL=[0.08, 0.08, 0.07, 0.04, 0.01, 0, 0]; XF=[1, 1, 1, 1, 1, 0, 0]
          SoilCrop RyegrassSoil: LL=[0.15, 0.13, 0.08, 0.02, 0.01, 0.01, 0.01]; KL=[0.08, 0.08, 0.07, 0.04, 0.01, 0, 0]; XF=[1, 1, 1, 1, 1, 0, 0]
          SoilCrop WhiteCloverSoil: LL=[0.15, 0.13, 0.08, 0.02, 0.01, 0.01, 0.01]; KL=[0.08, 0.08, 0.07, 0.04, 0.01, 0, 0]; XF=[1, 1, 1, 1, 1, 0, 0]
          SoilCrop maize: LL=[0.15, 0.13, 0.08, 0.02, 0.01, 0.01, 0.01]; KL=[0.06, 0.06, 0.06, 0.06, 0.06, 0.06, 0.06]; XF=[1, 1, 1, 1, 1, 1, 1]
          SoilCrop cotton: LL=[0.14, 0.14, 0.03, 0.02, 0.02, 0.02, 0.02]; KL=[0.1, 0.1, 0.1, 0.1, 0.09, 0.07, 0.05]; XF=[1, 1, 1, 1, 1, 1, 1]
          SoilCrop sorghum: LL=[0.14, 0.14, 0.03, 0.02, 0.02, 0.02, 0.02]; KL=[0.07, 0.07, 0.07, 0.05, 0.05, 0.04, 0.03]; XF=[1, 1, 1, 1, 1, 1, 0.9]
          SoilCrop slurp: LL=[0.14, 0.14, 0.03, 0.02, 0.02, 0.02, 0.02]; KL=[0.06, 0.06, 0.06, 0.06, 0.06, 0.06, 0.06]; XF=[1, 1, 1, 1, 1, 1, 1]
        SoilWater: same as Test1.Field.Soil.SoilWater
        SoilNitrogen: fom_type=[default, manure, mucuna, lablab, shemp, stable]; fract_carb=[0.2, 0.3, 0.54, 0.57, 0.45, 0]; fract_cell=[0.7, 0.3, 0.37, 0.37, 0.47, 0.1]; fract_lign=[0.1, 0.4, 0.09, 0.06, 0.08, 0.9]; wfpsN2N2O_x=[22, 88]; wfpsN2N2O_y=[0.1, 1]
          oc=[3.71368, 2.46983, 1.2384, 0.49836, 0.250251, 0.150353, 0.100194]
        SoilOrganicMatter: same as Test1.Field.Soil.SoilOrganicMatter
        InitialWater Initial water: PercentMethod=EvenlyDistributed; FractionFull=0.99
        Sample Initial nitrogen: same as Test1.Field.Soil.Initial nitrogen
      SwardProto Sward: AgPastureControlled=yes; WaterUptakeSource=sward; NUptakeSource=sward; UseAlternativeWaterUptake=no; UseAlternativeNUptake=no; ReferenceKSuptake=1000; ExpoLinearDepthParam=0.12; ExpoLinearCurveParam=3.2
        PastureSpeciesSwd Ryegrass: SpeciesFamily=grass; SpeciesPhotoPathway=C3; InitialDMShoot=2000; InitialDMRoot=500; InitialRootDepth=750; ReferencePhotosynthesisRate=1; MaintenanceRespirationCoefficient=0.03; GrowthRespirationCoefficient=0.25; LightExtentionCoeff=0.5; GrowthTmin=2; GrowthTmax=32; GrowthTopt=20; GrowthTq=1.75; HeatOnsetT=28; HeatFullT=35; HeatSumT=30; ReferenceT4Heat=25; ColdFullT=-3; ColdSumT=20; SpecificLeafArea=20; SpecificRootLength=75; MaxRootFraction=0.25; ShootSeasonalAllocationIncrease=0.8; DayInitHigherShootAllocation=232; HigherShootAllocationPeriods=[35, 60, 30]; FracToLeaf=0.7; TurnoverRateLive2Dead=0.025; TurnoverRateDead2Litter=0.11; TurnoverRateRootSenescence=0.02; TissueTurnoverTmin=2; TissueTurnoverTopt=20; TissueTurnoverWFactorMax=2; TissueTurnoverGLFWopt=0.5; DigestibilityLive=0.6; DigestibilityDead=0.2; MinimumGreenWt=300; PreferenceForGreenDM=1; PreferenceForDeadDM=1; LeafNopt=4; LeafNmax=5; LeafNmin=1.2; RelativeNStems=0.5; RelativeNRoots=0.5; RelativeNStage2=1; RelativeNStage3=1; DillutionCoefN=0.5; GlfGeneric=1; WaterStressExponent=1; WaterLoggingCoefficient=0.1; ReferenceCO2=380; CoefficientCO2EffectOnPhotosynthesis=700; OffsetCO2EffectOnNuptake=600; MinimumCO2EffectOnNuptake=0.7; ExponentCO2EffectOnNuptake=2; ExpoLinearDepthParam=0.12; ExpoLinearCurveParam=3.2; MaximumStomatalConductance=1; KNO3=1; KNH4=1
          zero: interceptedRadn, ColdOnsetT, ReferenceT4Cold, FracToStolon, MinimumDeadWt, RelativeNStolons, MinimumNFixation, MaximumNFixation, KappaNRemob2, KappaNRemob3, KappaNRemob4
      Report Rep01sward: EventNames=[Clock].DoReport
        VariableNames:
          [Clock].Today
          Sward.Name
          Sward.CropType
          Sward.PlantStatus
          Sward.Stage
          Sward.StageName
          Sward.TotalC
          Sward.TotalWt
          Sward.AboveGroundWt
          Sward.AboveGroundLiveWt
          Sward.AboveGroundDeadWt
          Sward.BelowGroundWt
          Sward.StandingWt
          Sward.LeafWt
          Sward.LeafLiveWt
          Sward.LeafDeadWt
          Sward.StemWt
          Sward.StemLiveWt
          Sward.StemDeadWt
          Sward.StolonWt
          Sward.RootWt
          Sward.GrossPotentialGrowthWt
          Sward.NetPotentialGrowthWt
          Sward.PotGrowthWt_Wstress
          Sward.ActualGrowthWt
          Sward.EffectiveGrowthWt
          Sward.HerbageGrowthWt
          Sward.LitterDepositionWt
          Sward.RootSenescenceWt
          Sward.TotalN
          Sward.AboveGroundN
          Sward.AboveGroundLiveN
          Sward.AboveGroundDeadN
          Sward.BelowGroundN
          Sward.StandingN
          Sward.LeafN
          Sward.StemN
          Sward.StolonN
          Sward.RootN
          Sward.StandingNConc
          Sward.LeafNConc
          Sward.StemNConc
          Sward.StolonNConc
          Sward.RootNConc
          Sward.ActualGrowthNConc
          Sward.SenescedNRemobilisable
          Sward.NitrogenRemobilisedSenescence
          Sward.LuxuryNRemobilisable
          Sward.NitrogenRemobilisedLuxury
          Sward.NitrogenFixed
          Sward.NitrogenRequiredLuxury
          Sward.NitrogenRequiredOptimum
          Sward.NitrogenDemand
          sum(Sward.NitrogenAvailable) as NitrogenAvailable
          sum(Sward.NitrogenUptake) as NitrogenUptake
          Sward.LitterDepositionN
          Sward.RootSenescenceN
          Sward.ActualGrowthN
          Sward.DMToShoot
          Sward.DMToRoots
          Sward.FractionGrowthToRoot
          Sward.TotalLAI
          Sward.GreenLAI
          Sward.DeadLAI
          Sward.TotalCover
          Sward.GreenCover
          Sward.DeadCover
          Sward.Height
          Sward.WaterDemand
          sum(Sward.SoilAvailableWater) as SoilAvailableWater
          sum(Sward.WaterUptake) as WaterUptake
          Sward.GlfTemperature
          Sward.GlfWater
          Sward.GlfNConcentration
          Sward.GlfN
          Sward.GlfGeneric
          Sward.HarvestableWt
          Sward.HarvestedWt
          Sward.HarvestedN
          Sward.HerbageDigestibility
          Sward.HarvestedDigestibility
          Sward.HerbageME
          Sward.GPP
          Sward.NPP
          Sward.NAPP
      Report Rep02ryegrass: EventNames=[Clock].EndOfDay
        VariableNames:
          [Clock].Today
          Sward.Ryegrass.Name
          Sward.Ryegrass.CropType
          Sward.Ryegrass.TotalWt
          Sward.Ryegrass.AboveGroundWt
          Sward.Ryegrass.BelowGroundWt
          Sward.Ryegrass.StandingWt
          Sward.Ryegrass.StandingLiveWt
          Sward.Ryegrass.StandingDeadWt
          Sward.Ryegrass.LeafWt
          Sward.Ryegrass.StemWt
          Sward.Ryegrass.StolonWt
          Sward.Ryegrass.RootWt
          Sward.Ryegrass.LeafStage1Wt
          Sward.Ryegrass.LeafStage2Wt
          Sward.Ryegrass.LeafStage3Wt
          Sward.Ryegrass.LeafStage4Wt
          Sward.Ryegrass.StemStage1Wt
          Sward.Ryegrass.StemStage2Wt
          Sward.Ryegrass.StemStage3Wt
          Sward.Ryegrass.StemStage4Wt
          Sward.Ryegrass.StolonStage1Wt
          Sward.Ryegrass.StolonStage2Wt
          Sward.Ryegrass.StolonStage3Wt
          Sward.Ryegrass.PotCarbonAssimilation
          Sward.Ryegrass.CarbonLossRespiration
          Sward.Ryegrass.GrossPotentialGrowthWt
          Sward.Ryegrass.NetPotentialGrowthWt
          Sward.Ryegrass.PotGrowthWt_Wstress
          Sward.Ryegrass.ActualGrowthWt
          Sward.Ryegrass.LitterWt
          Sward.Ryegrass.RootSenescedWt
          Sward.Ryegrass.TotalN
          Sward.Ryegrass.StandingN
          Sward.Ryegrass.LeafN
          Sward.Ryegrass.StemN
          Sward.Ryegrass.StolonN
          Sward.Ryegrass.RootN
          Sward.Ryegrass.LeafStage1N
          Sward.Ryegrass.LeafStage2N
          Sward.Ryegrass.LeafStage3N
          Sward.Ryegrass.LeafStage4N
          Sward.Ryegrass.StemStage1N
          Sward.Ryegrass.StemStage2N
          Sward.Ryegrass.StemStage3N
          Sward.Ryegrass.StemStage4N
          Sward.Ryegrass.StolonStage1N
          Sward.Ryegrass.StolonStage2N
          Sward.Ryegrass.StolonStage3N
          Sward.Ryegrass.LeafNConc
          Sward.Ryegrass.StemNConc
          Sward.Ryegrass.StolonNConc
          Sward.Ryegrass.RootNConc
          Sward.Ryegrass.LeafStage1NConc
          Sward.Ryegrass.LeafStage2NConc
          Sward.Ryegrass.LeafStage3NConc
          Sward.Ryegrass.LeafStage4NConc
          Sward.Ryegrass.StemStage1NConc
          Sward.Ryegrass.StemStage2NConc
          Sward.Ryegrass.StemStage3NConc
          Sward.Ryegrass.StemStage4NConc
          Sward.Ryegrass.StolonStage1NConc
          Sward.Ryegrass.StolonStage2NConc
          Sward.Ryegrass.StolonStage3NConc
          Sward.Ryegrass.RemobilisableSenescedN
          Sward.Ryegrass.RemobilisedSenescedN
          Sward.Ryegrass.RemobilisableLuxuryN
          Sward.Ryegrass.RemobilisedLuxuryN
          Sward.Ryegrass.FixedN
          Sward.Ryegrass.RequiredLuxuryN
          Sward.Ryegrass.RequiredOptimumN
          Sward.Ryegrass.DemandSoilN
          sum(Sward.Ryegrass.UptakeN) as UptakeN
          Sward.Ryegrass.LitterN
          Sward.Ryegrass.SenescedRootN
          Sward.Ryegrass.ActualGrowthN
          Sward.Ryegrass.ActualGrowthNConc
          Sward.Ryegrass.LiveDMTurnoverRate
          Sward.Ryegrass.DeadDMTurnoverRate
          Sward.Ryegrass.StolonDMTurnoverRate
          Sward.Ryegrass.RootDMTurnoverRate
          Sward.Ryegrass.TotalLAI
          Sward.Ryegrass.GreenLAI
          Sward.Ryegrass.DeadLAI
          Sward.Ryegrass.GlfTemperature
          Sward.Ryegrass.GlfWater
          Sward.Ryegrass.GlfN
          Sward.Ryegrass.HarvestableWt
          Sward.Ryegrass.HarvestedWt
          Sward.Ryegrass.HarvestedFraction
          Sward.Ryegrass.HarvestedN
      Report Rep03layers: EventNames=[Clock].EndOfDay
        VariableNames:
          [Clock].Today
          Sward.Name
          [Soil].Thickness
          Sward.RootWtFraction
          Sward.RLD
          Sward.NitrogenAvailable
          Sward.NitrogenUptake
          Sward.SoilAvailableWater
          Sward.WaterUptake
      Report Rep04massbalance: EventNames=[Clock].EndOfDay
        VariableNames:
          [Clock].Today
          Sward.Name
          Sward.TotalN
          sum([Soil].NO3N) as TotalNO3
          sum([Soil].NH4N) as TotalNH4
          sum([Soil].SoilNitrogen.HumicN) as TotalHumusN
          sum([Soil].SoilNitrogen.MicrobialN) as TotalBiomN
          sum([Soil].SoilNitrogen.FOMN) as TotalFomN
          [SurfaceOrganicMatter].N
          Fertiliser.NitrogenApplied
          Sward.NitrogenFixed
          Sward.HarvestedN
          sum([Soil].SoilNitrogen.Denitrification) as Denitrification
          [Soil].SoilWater.LeachNO3
          sum(Sward.NitrogenUptake) as NitrogenUptake
          Sward.SenescedNRemobilisable
          Sward.NitrogenRemobilisedSenescence
          Sward.NitrogenRemobilisedLuxury
          Sward.ActualGrowthN
          Sward.LitterDepositionN
          Sward.RootSenescenceN
  Simulation Test3: Area=0; Slope=0
    Clock: StartDate=2000-07-01; EndDate=2002-06-30
    Weather: FileName=%root%\Tests\WeatherFiles\Ruakura.met
    Manager SetCO2: same as Test1.SetCO2
    Summary
    Zone Field: Area=0; Slope=0
      Manager CutRotation
        CutRotationStartDate = 0001-01-01
        CutInterval = 21
        PastureAmount = 1500
```csharp
using System;
using Models.Core;
using Models.PMF;
namespace Models
{
	[Serializable]
	public class Script : Model
	{      
		[Link] Clock Clock;
		[Link] AgPasture.PastureSpeciesSwd Pasture;
		
		[Description("Date to begin rotation:")]
		public DateTime CutRotationStartDate {get; set;}
		[Description("Rotation interval (days):")]
		public int CutInterval {get; set;}
		[Description("Residual amount of pasture (kg/ha):")]
		public double PastureAmount {get; set;}
		
		private bool RotationAllowed = true;
		private int DaysAfterCut { get; set; }
		
        [EventSubscribe("Commencing")]
        private void OnSimulationCommencing(object sender, EventArgs e)
		{
			DaysAfterCut = 1000;
		}
		
		[EventSubscribe("DoManagement")]
		private void OnDoManagement(object sender, EventArgs e)
		{
			if(RotationAllowed)
			{
				if (Clock.Today.Date >= CutRotationStartDate.Date)
				{
					if (DaysAfterCut >= CutInterval)
					{
						Pasture.Harvest(type:"SetResidueAmount",amount:PastureAmount);
						DaysAfterCut = 0;
					}
					else
					{
						DaysAfterCut += 1;
					}
				}
			}
		}
	}
}
```
      MicroClimate: same as Test1.Field.MicroClimate
      Irrigation
      Fertiliser
      SurfaceOrganicMatter: same as Test2.Field.SurfaceOrganicMatter
      Soil: same as Test2.Field.Soil
      PastureSpeciesSwd Ryegrass: same as Test2.Field.Sward.Ryegrass
      Report Rep02ryegrass: EventNames=[Clock].EndOfDay
        VariableNames:
          [Clock].Today
          Ryegrass.Name
          Ryegrass.CropType
          Ryegrass.TotalWt
          Ryegrass.AboveGroundWt
          Ryegrass.BelowGroundWt
          Ryegrass.StandingWt
          Ryegrass.StandingLiveWt
          Ryegrass.StandingDeadWt
          Ryegrass.LeafWt
          Ryegrass.StemWt
          Ryegrass.StolonWt
          Ryegrass.RootWt
          Ryegrass.LeafStage1Wt
          Ryegrass.LeafStage2Wt
          Ryegrass.LeafStage3Wt
          Ryegrass.LeafStage4Wt
          Ryegrass.StemStage1Wt
          Ryegrass.StemStage2Wt
          Ryegrass.StemStage3Wt
          Ryegrass.StemStage4Wt
          Ryegrass.StolonStage1Wt
          Ryegrass.StolonStage2Wt
          Ryegrass.StolonStage3Wt
          Ryegrass.PotCarbonAssimilation
          Ryegrass.CarbonLossRespiration
          Ryegrass.GrossPotentialGrowthWt
          Ryegrass.NetPotentialGrowthWt
          Ryegrass.PotGrowthWt_Wstress
          Ryegrass.ActualGrowthWt
          Ryegrass.EffectiveGrowthWt
          Ryegrass.HerbageGrowthWt
          Ryegrass.LitterWt
          Ryegrass.RootSenescedWt
          Ryegrass.TotalN
          Ryegrass.StandingN
          Ryegrass.LeafN
          Ryegrass.StemN
          Ryegrass.StolonN
          Ryegrass.RootN
          Ryegrass.LeafStage1N
          Ryegrass.LeafStage2N
          Ryegrass.LeafStage3N
          Ryegrass.LeafStage4N
          Ryegrass.StemStage1N
          Ryegrass.StemStage2N
          Ryegrass.StemStage3N
          Ryegrass.StemStage4N
          Ryegrass.StolonStage1N
          Ryegrass.StolonStage2N
          Ryegrass.StolonStage3N
          Ryegrass.LeafNConc
          Ryegrass.StemNConc
          Ryegrass.StolonNConc
          Ryegrass.RootNConc
          Ryegrass.LeafStage1NConc
          Ryegrass.LeafStage2NConc
          Ryegrass.LeafStage3NConc
          Ryegrass.LeafStage4NConc
          Ryegrass.StemStage1NConc
          Ryegrass.StemStage2NConc
          Ryegrass.StemStage3NConc
          Ryegrass.StemStage4NConc
          Ryegrass.StolonStage1NConc
          Ryegrass.StolonStage2NConc
          Ryegrass.StolonStage3NConc
          Ryegrass.RemobilisableSenescedN
          Ryegrass.RemobilisedSenescedN
          Ryegrass.RemobilisableLuxuryN
          Ryegrass.RemobilisedLuxuryN
          Ryegrass.FixedN
          Ryegrass.RequiredLuxuryN
          Ryegrass.RequiredOptimumN
          Ryegrass.DemandSoilN
          sum(Ryegrass.UptakeN) as UptakeN
          Ryegrass.LitterN
          Ryegrass.SenescedRootN
          Ryegrass.ActualGrowthN
          Ryegrass.ActualGrowthNConc
          Ryegrass.WaterDemand
          sum(Ryegrass.WaterUptake) as WaterUptake
          Ryegrass.LiveDMTurnoverRate
          Ryegrass.DeadDMTurnoverRate
          Ryegrass.StolonDMTurnoverRate
          Ryegrass.RootDMTurnoverRate
          Ryegrass.TotalLAI
          Ryegrass.GreenLAI
          Ryegrass.DeadLAI
          Ryegrass.GlfTemperature
          Ryegrass.GlfWater
          Ryegrass.GlfN
          Ryegrass.HarvestableWt
          Ryegrass.HarvestedWt
          Ryegrass.HarvestedFraction
          Ryegrass.HarvestedN
          Ryegrass.HerbageDigestibility
      Report Rep03layers: EventNames=[Clock].EndOfDay
        VariableNames:
          [Clock].Today
          Sward.Name
          [Soil].Thickness
          Ryegrass.RootWtFraction
          Ryegrass.RLD
          Ryegrass.NitrogenAvailable
          Ryegrass.NitrogenUptake
          Ryegrass.SoilAvailableWater
          Ryegrass.WaterUptake
      Report Rep04massbalance: EventNames=[Clock].EndOfDay
        VariableNames:
          [Clock].Today
          Ryegrass.Name
          Ryegrass.TotalN
          sum([Soil].NO3N) as TotalNO3
          sum([Soil].NH4N) as TotalNH4
          sum([Soil].SoilNitrogen.HumicN) as TotalHumusN
          sum([Soil].SoilNitrogen.MicrobialN) as TotalBiomN
          sum([Soil].SoilNitrogen.FOMN) as TotalFomN
          [SurfaceOrganicMatter].N
          Fertiliser.NitrogenApplied
          Ryegrass.FixedN as NitrogeFixed
          Ryegrass.HarvestedN
          sum([Soil].SoilNitrogen.Denitrification) as Denitrification
          [Soil].SoilWater.LeachNO3
          sum(Ryegrass.UptakeN) as NitrogenUptake
          Ryegrass.SenescedNRemobilisable
          Ryegrass.SenescedNRemobilised as NitrogenRemobilisedSenescence
          Ryegrass.RemobilisedLuxuryN as NitrogenRemobilisedLuxury
          Ryegrass.ActualGrowthN
          Ryegrass.LitterN as LitterDepositionN
          Ryegrass.SenescedRootN as RootSenescenceN
  Simulation Test2_2: Area=0; Slope=0
    Clock: StartDate=2000-07-01; EndDate=2002-06-30
    Weather: FileName=%root%\Tests\WeatherFiles\Ruakura.met
    Manager SetCO2: same as Test1.SetCO2
    Summary
    Zone Field: Area=0; Slope=0
      Manager CutRotation
        CutRotationStartDate = 0001-01-01
        CutInterval = 21
        PastureAmount = 1500
        script: same as in Test2.Field.CutRotation
      MicroClimate: same as Test1.Field.MicroClimate
      Arbitrator: ArbitrationMethod=new; NutrientUptakeMethod=1
      Irrigation
      Fertiliser
      SurfaceOrganicMatter: same as Test2.Field.SurfaceOrganicMatter
      Soil: same as Test2.Field.Soil
      SwardProto Sward: same as Test2.Field.Sward
      Report Rep01sward: same as Test2.Field.Rep01sward
      Report Rep02ryegrass: same as Test2.Field.Rep02ryegrass
      Report Rep03layers: EventNames=[Clock].EndOfDay
        VariableNames:
          [Clock].Today
          Sward.Name
          [Soil].Thickness
          Sward.RootWtFraction
          Sward.RLD
          Sward.NitrogenAvailable
          Sward.NitrogenUptake
          Sward.SoilAvailableWater
          Sward.WaterUptake
      Report Rep04massbalance: same as Test2.Field.Rep04massbalance
  Simulation Test3_2: Area=0; Slope=0
    Clock: StartDate=2000-07-01; EndDate=2002-06-30
    Weather: FileName=%root%\Tests\WeatherFiles\Ruakura.met
    Manager SetCO2: same as Test1.SetCO2
    Summary
    Zone Field: Area=0; Slope=0
      Manager CutRotation: same as Test3.Field.CutRotation
      MicroClimate: same as Test1.Field.MicroClimate
      Arbitrator: ArbitrationMethod=new; NutrientUptakeMethod=1
      Irrigation
      Fertiliser
      SurfaceOrganicMatter: same as Test2.Field.SurfaceOrganicMatter
      Soil: same as Test2.Field.Soil
      PastureSpeciesSwd Ryegrass: same as Test2.Field.Sward.Ryegrass
      Report Rep02ryegrass: same as Test3.Field.Rep02ryegrass
      Report Rep03layers: EventNames=[Clock].EndOfDay
        VariableNames:
          [Clock].Today
          Sward.Name
          [Soil].Thickness
          Ryegrass.RootWtFraction
          Ryegrass.RLD
          Ryegrass.NitrogenAvailable
          Ryegrass.NitrogenUptake
          Ryegrass.SoilAvailableWater
          Ryegrass.WaterUptake
      Report Rep04massbalance: same as Test3.Field.Rep04massbalance
  Simulation Test2_3: Area=0; Slope=0
    Clock: StartDate=2000-07-01; EndDate=2002-06-30
    Weather: FileName=%root%\Tests\WeatherFiles\Ruakura.met
    Manager SetCO2: same as Test1.SetCO2
    Summary
    Zone Field: Area=0; Slope=0
      Manager CutRotation
        CutRotationStartDate = 0001-01-01
        CutInterval = 21
        PastureAmount = 1500
```csharp
using System;
using Models.Core;
using Models.PMF;
namespace Models
{
	[Serializable]
	public class Script : Model
	{      
		[Link] Clock Clock;
		[Link] AgPasture.SwardProto Sward;
		
		[Description("Date to begin rotation:")]
		public DateTime CutRotationStartDate {get; set;}
		[Description("Rotation interval (days):")]
		public int CutInterval {get; set;}
		[Description("Residual amount of pasture (kg/ha):")]
		public double PastureAmount {get; set;}
		
		private bool RotationAllowed = true;
		private int DaysAfterCut { get; set; }
		
        [EventSubscribe("Commencing")]
        private void OnSimulationCommencing(object sender, EventArgs e)
		{
			DaysAfterCut = 1000;
		}
		
		[EventSubscribe("DoManagement")]
		private void OnDoManagement(object sender, EventArgs e)
		{
			if(RotationAllowed)
			{
				if (Clock.Today.Date >= CutRotationStartDate.Date)
				{
					if (DaysAfterCut >= CutInterval)
					{
						Sward.Harvest(type:"SetResidueAmount",amount:PastureAmount);
						//Sward.Harvest(PastureAmount,"SetResidueAmount");
						DaysAfterCut = 0;
					}
					else
					{
						DaysAfterCut += 1;
					}
				}
			}
		}
	}
}
```
      MicroClimate: same as Test1.Field.MicroClimate
      Arbitrator: ArbitrationMethod=new; NutrientUptakeMethod=1
      Irrigation
      Fertiliser
      SurfaceOrganicMatter: same as Test2.Field.SurfaceOrganicMatter
      Soil: same as Test2.Field.Soil
      SwardProto Sward: AgPastureControlled=yes; WaterUptakeSource=species; NUptakeSource=species; UseAlternativeWaterUptake=no; UseAlternativeNUptake=no; ReferenceKSuptake=1000; ExpoLinearDepthParam=0.12; ExpoLinearCurveParam=3.2
        PastureSpeciesSwd Ryegrass: same as Test2.Field.Sward.Ryegrass
        PastureSpeciesSwd WhiteClover: interceptedRadn=0; SpeciesFamily=legume; SpeciesPhotoPathway=C3; InitialDMShoot=500; InitialDMRoot=250; InitialRootDepth=350; ReferencePhotosynthesisRate=1; MaintenanceRespirationCoefficient=0.03; GrowthRespirationCoefficient=0.25; LightExtentionCoeff=0.8; GrowthTmin=4; GrowthTmax=32; GrowthTopt=20; GrowthTq=1.75; HeatOnsetT=28; HeatFullT=35; HeatSumT=30; ReferenceT4Heat=25; ColdOnsetT=0; ColdFullT=-3; ColdSumT=20; ReferenceT4Cold=0; SpecificLeafArea=20; SpecificRootLength=75; MaxRootFraction=0.25; ShootSeasonalAllocationIncrease=0.8; DayInitHigherShootAllocation=232; HigherShootAllocationPeriods=[35, 60, 30]; FracToLeaf=0.56; FracToStolon=0.2; TurnoverRateLive2Dead=0.025; TurnoverRateDead2Litter=0.11; TurnoverRateRootSenescence=0.02; TissueTurnoverTmin=3; TissueTurnoverTopt=20; TissueTurnoverWFactorMax=2; TissueTurnoverGLFWopt=0.5; DigestibilityLive=0.6; DigestibilityDead=0.2; MinimumGreenWt=100; MinimumDeadWt=0; PreferenceForGreenDM=1; PreferenceForDeadDM=1; LeafNopt=4.5; LeafNmax=5.5; LeafNmin=2; RelativeNStems=0.5; RelativeNStolons=0.5; RelativeNRoots=0.5; RelativeNStage2=1; RelativeNStage3=1; MinimumNFixation=0.2; MaximumNFixation=0.6; KappaNRemob2=0; KappaNRemob3=0; KappaNRemob4=0; DillutionCoefN=1; GlfGeneric=1; WaterStressExponent=1; WaterLoggingCoefficient=0.1; ReferenceCO2=380; CoefficientCO2EffectOnPhotosynthesis=700; OffsetCO2EffectOnNuptake=600; MinimumCO2EffectOnNuptake=0.7; ExponentCO2EffectOnNuptake=2; ExpoLinearDepthParam=0.12; ExpoLinearCurveParam=3.2; MaximumStomatalConductance=1; KNO3=1; KNH4=1
      Report Rep01sward: same as Test2.Field.Rep01sward
      Report Rep02ryegrass: same as Test2.Field.Rep02ryegrass
      Report Rep03whiteclover: EventNames=[Clock].EndOfDay
        VariableNames:
          [Clock].Today
          Sward.WhiteClover.Name
          Sward.WhiteClover.CropType
          Sward.WhiteClover.TotalWt
          Sward.WhiteClover.AboveGroundWt
          Sward.WhiteClover.BelowGroundWt
          Sward.WhiteClover.StandingWt
          Sward.WhiteClover.StandingLiveWt
          Sward.WhiteClover.StandingDeadWt
          Sward.WhiteClover.LeafWt
          Sward.WhiteClover.StemWt
          Sward.WhiteClover.StolonWt
          Sward.WhiteClover.RootWt
          Sward.WhiteClover.LeafStage1Wt
          Sward.WhiteClover.LeafStage2Wt
          Sward.WhiteClover.LeafStage3Wt
          Sward.WhiteClover.LeafStage4Wt
          Sward.WhiteClover.StemStage1Wt
          Sward.WhiteClover.StemStage2Wt
          Sward.WhiteClover.StemStage3Wt
          Sward.WhiteClover.StemStage4Wt
          Sward.WhiteClover.StolonStage1Wt
          Sward.WhiteClover.StolonStage2Wt
          Sward.WhiteClover.StolonStage3Wt
          Sward.WhiteClover.PotCarbonAssimilation
          Sward.WhiteClover.CarbonLossRespiration
          Sward.WhiteClover.GrossPotentialGrowthWt
          Sward.WhiteClover.NetPotentialGrowthWt
          Sward.WhiteClover.PotGrowthWt_Wstress
          Sward.WhiteClover.ActualGrowthWt
          Sward.WhiteClover.LitterWt
          Sward.WhiteClover.RootSenescedWt
          Sward.WhiteClover.TotalN
          Sward.WhiteClover.StandingN
          Sward.WhiteClover.LeafN
          Sward.WhiteClover.StemN
          Sward.WhiteClover.StolonN
          Sward.WhiteClover.RootN
          Sward.WhiteClover.LeafStage1N
          Sward.WhiteClover.LeafStage2N
          Sward.WhiteClover.LeafStage3N
          Sward.WhiteClover.LeafStage4N
          Sward.WhiteClover.StemStage1N
          Sward.WhiteClover.StemStage2N
          Sward.WhiteClover.StemStage3N
          Sward.WhiteClover.StemStage4N
          Sward.WhiteClover.StolonStage1N
          Sward.WhiteClover.StolonStage2N
          Sward.WhiteClover.StolonStage3N
          Sward.WhiteClover.LeafNConc
          Sward.WhiteClover.StemNConc
          Sward.WhiteClover.StolonNConc
          Sward.WhiteClover.RootNConc
          Sward.WhiteClover.LeafStage1NConc
          Sward.WhiteClover.LeafStage2NConc
          Sward.WhiteClover.LeafStage3NConc
          Sward.WhiteClover.LeafStage4NConc
          Sward.WhiteClover.StemStage1NConc
          Sward.WhiteClover.StemStage2NConc
          Sward.WhiteClover.StemStage3NConc
          Sward.WhiteClover.StemStage4NConc
          Sward.WhiteClover.StolonStage1NConc
          Sward.WhiteClover.StolonStage2NConc
          Sward.WhiteClover.StolonStage3NConc
          Sward.WhiteClover.RemobilisableSenescedN
          Sward.WhiteClover.RemobilisedSenescedN
          Sward.WhiteClover.RemobilisableLuxuryN
          Sward.WhiteClover.RemobilisedLuxuryN
          Sward.WhiteClover.FixedN
          Sward.WhiteClover.RequiredLuxuryN
          Sward.WhiteClover.RequiredOptimumN
          Sward.WhiteClover.DemandSoilN
          sum(Sward.WhiteClover.UptakeN) as UptakeN
          Sward.WhiteClover.LitterN
          Sward.WhiteClover.SenescedRootN
          Sward.WhiteClover.ActualGrowthN
          Sward.WhiteClover.ActualGrowthNConc
          Sward.WhiteClover.LiveDMTurnoverRate
          Sward.WhiteClover.DeadDMTurnoverRate
          Sward.WhiteClover.StolonDMTurnoverRate
          Sward.WhiteClover.RootDMTurnoverRate
          Sward.WhiteClover.TotalLAI
          Sward.WhiteClover.GreenLAI
          Sward.WhiteClover.DeadLAI
          Sward.WhiteClover.GlfTemperature
          Sward.WhiteClover.GlfWater
          Sward.WhiteClover.GlfN
          Sward.WhiteClover.HarvestableWt
          Sward.WhiteClover.HarvestedWt
          Sward.WhiteClover.HarvestedFraction
          Sward.WhiteClover.HarvestedN
      Report Rep04layers: EventNames=[Clock].EndOfDay
        VariableNames:
          [Clock].Today
          Sward.Name
          [Soil].Thickness
          Sward.RootWtFraction
          Sward.RLD
          Sward.NitrogenAvailable
          Sward.NitrogenUptake
          Sward.SoilAvailableWater
          Sward.WaterUptake
      Report Rep05massbalance: same as Test2.Field.Rep04massbalance
  Simulation Test3_3: Area=0; Slope=0
    Clock: StartDate=2000-07-01; EndDate=2002-06-30
    Weather: FileName=%root%\Tests\WeatherFiles\Ruakura.met
    Manager SetCO2: same as Test1.SetCO2
    Summary
    Zone Field: Area=0; Slope=0
      Manager CutRotation
        CutRotationStartDate = 0001-01-01
        CutInterval = 21
        ResidualAmount = 1500
```csharp
using System;
using System.Collections.Generic;
using Models.Core;
using Models.PMF;
namespace Models
{
	[Serializable]
	public class Script : Model
	{
		[Link] Clock Clock;
		//[Link] AgPasture1.PastureSpecies myPasture;
		[Link] Zone myZone;
		
		[Description("Date to begin rotation:")]
		public DateTime CutRotationStartDate { get; set; }
		[Description("Rotation interval (days):")]
		public int CutInterval { get; set; }
		[Description("Residual amount of pasture (kg/ha):")]
		public double ResidualAmount { get; set; }
		
		public double[] CutResidualWt;

		private bool RotationAllowed = true;
		private int DaysAfterCut { get; set; }
		
		private List<AgPasture.PastureSpeciesSwd> myPasture = new List<AgPasture.PastureSpeciesSwd>();

		[EventSubscribe("Commencing")]
		private void OnSimulationCommencing(object sender, EventArgs e)
		{
			DaysAfterCut = 1000;
			foreach (var plant in Apsim.FindAll(this, typeof(AgPasture.PastureSpeciesSwd)))
			{
				myPasture.Add(plant as AgPasture.PastureSpeciesSwd);
			}
		}
		
		[EventSubscribe("DoManagement")]
		private void OnDoManagement(object sender, EventArgs e)
		{
			if (RotationAllowed)
			{
				if (Clock.Today.Date >= CutRotationStartDate.Date)
				{
					if (DaysAfterCut >= CutInterval)
					{
						DoCuttings();
						DaysAfterCut = 0;
					}
					else
					{
						DaysAfterCut += 1;
					}
				}
			}
		}
		
		private void DoCuttings()
		{
			CutResidualWt = new double[myPasture.Count];
			double ExistingWt = 0.0;
			double LeftoffWt = 0.0;
			double[] WtAmount = new double[myPasture.Count];
			double[] WtMinimum = new double[myPasture.Count];
			for (int p = 0; p < myPasture.Count; p++)
			{ // get the existing amount and the minimum Wt
				WtAmount[p] = myPasture[p].StandingWt;
				WtMinimum[p] = myPasture[p].MinimumGreenWt + myPasture[p].MinimumDeadWt;
				ExistingWt += WtAmount[p];
			}
			for (int p = 0; p < myPasture.Count; p++)
			{ // compute residuals for each species (proportional to existing Wt)
				CutResidualWt[p] = ResidualAmount * (WtAmount[p] / ExistingWt);
				CutResidualWt[p] = Math.Max(CutResidualWt[p], WtMinimum[p]);
				LeftoffWt += CutResidualWt[p];
			}
			if (LeftoffWt > ResidualAmount)
			{
				for (int p = 0; p < myPasture.Count; p++)
				{ // Increase residual to match amount desired
					CutResidualWt[p] *= ResidualAmount / LeftoffWt;
				}
			}

			for (int p = 0; p < myPasture.Count; p++)
			{
				myPasture[p].Harvest(type: "SetResidueAmount", amount: CutResidualWt[p]);
			}
		}
	}
}
```
      MicroClimate: same as Test1.Field.MicroClimate
      Arbitrator: ArbitrationMethod=new; NutrientUptakeMethod=1
      Irrigation
      Fertiliser
      SurfaceOrganicMatter: same as Test2.Field.SurfaceOrganicMatter
      Soil: same as Test2.Field.Soil
      PastureSpeciesSwd Ryegrass: same as Test2.Field.Sward.Ryegrass
      PastureSpeciesSwd WhiteClover: interceptedRadn=0; SpeciesFamily=grass; SpeciesPhotoPathway=C3; InitialDMShoot=500; InitialDMRoot=250; InitialRootDepth=350; ReferencePhotosynthesisRate=1; MaintenanceRespirationCoefficient=0.03; GrowthRespirationCoefficient=0.25; LightExtentionCoeff=0.8; GrowthTmin=4; GrowthTmax=32; GrowthTopt=20; GrowthTq=1.75; HeatOnsetT=28; HeatFullT=35; HeatSumT=30; ReferenceT4Heat=25; ColdOnsetT=0; ColdFullT=-3; ColdSumT=20; ReferenceT4Cold=0; SpecificLeafArea=20; SpecificRootLength=75; MaxRootFraction=0.25; ShootSeasonalAllocationIncrease=0.8; DayInitHigherShootAllocation=232; HigherShootAllocationPeriods=[35, 60, 30]; FracToLeaf=0.56; FracToStolon=0.2; TurnoverRateLive2Dead=0.025; TurnoverRateDead2Litter=0.11; TurnoverRateRootSenescence=0.02; TissueTurnoverTmin=3; TissueTurnoverTopt=20; TissueTurnoverWFactorMax=2; TissueTurnoverGLFWopt=0.5; DigestibilityLive=0.6; DigestibilityDead=0.2; MinimumGreenWt=100; MinimumDeadWt=0; PreferenceForGreenDM=1; PreferenceForDeadDM=1; LeafNopt=4.5; LeafNmax=5.5; LeafNmin=2; RelativeNStems=0.5; RelativeNStolons=0.5; RelativeNRoots=0.5; RelativeNStage2=1; RelativeNStage3=1; MinimumNFixation=0.2; MaximumNFixation=0.6; KappaNRemob2=0; KappaNRemob3=0; KappaNRemob4=0; DillutionCoefN=1; GlfGeneric=1; WaterStressExponent=1; WaterLoggingCoefficient=0.1; ReferenceCO2=380; CoefficientCO2EffectOnPhotosynthesis=700; OffsetCO2EffectOnNuptake=600; MinimumCO2EffectOnNuptake=0.7; ExponentCO2EffectOnNuptake=2; ExpoLinearDepthParam=0.12; ExpoLinearCurveParam=3.2; MaximumStomatalConductance=1; KNO3=1; KNH4=1
      Report Rep02ryegrass: EventNames=[Clock].EndOfDay
        VariableNames:
          [Clock].Today
          Ryegrass.Name
          Ryegrass.CropType
          Ryegrass.TotalWt
          Ryegrass.AboveGroundWt
          Ryegrass.BelowGroundWt
          Ryegrass.StandingWt
          Ryegrass.StandingLiveWt
          Ryegrass.StandingDeadWt
          Ryegrass.LeafWt
          Ryegrass.StemWt
          Ryegrass.StolonWt
          Ryegrass.RootWt
          Ryegrass.LeafStage1Wt
          Ryegrass.LeafStage2Wt
          Ryegrass.LeafStage3Wt
          Ryegrass.LeafStage4Wt
          Ryegrass.StemStage1Wt
          Ryegrass.StemStage2Wt
          Ryegrass.StemStage3Wt
          Ryegrass.StemStage4Wt
          Ryegrass.StolonStage1Wt
          Ryegrass.StolonStage2Wt
          Ryegrass.StolonStage3Wt
          Ryegrass.PotCarbonAssimilation
          Ryegrass.CarbonLossRespiration
          Ryegrass.GrossPotentialGrowthWt
          Ryegrass.NetPotentialGrowthWt
          Ryegrass.PotGrowthWt_Wstress
          Ryegrass.ActualGrowthWt
          Ryegrass.EffectiveGrowthWt
          Ryegrass.HerbageGrowthWt
          Ryegrass.LitterWt
          Ryegrass.RootSenescedWt
          Ryegrass.TotalN
          Ryegrass.StandingN
          Ryegrass.LeafN
          Ryegrass.StemN
          Ryegrass.StolonN
          Ryegrass.RootN
          Ryegrass.LeafStage1N
          Ryegrass.LeafStage2N
          Ryegrass.LeafStage3N
          Ryegrass.LeafStage4N
          Ryegrass.StemStage1N
          Ryegrass.StemStage2N
          Ryegrass.StemStage3N
          Ryegrass.StemStage4N
          Ryegrass.StolonStage1N
          Ryegrass.StolonStage2N
          Ryegrass.StolonStage3N
          Ryegrass.LeafNConc
          Ryegrass.StemNConc
          Ryegrass.StolonNConc
          Ryegrass.RootNConc
          Ryegrass.LeafStage1NConc
          Ryegrass.LeafStage2NConc
          Ryegrass.LeafStage3NConc
          Ryegrass.LeafStage4NConc
          Ryegrass.StemStage1NConc
          Ryegrass.StemStage2NConc
          Ryegrass.StemStage3NConc
          Ryegrass.StemStage4NConc
          Ryegrass.StolonStage1NConc
          Ryegrass.StolonStage2NConc
          Ryegrass.StolonStage3NConc
          Ryegrass.RemobilisableSenescedN
          Ryegrass.RemobilisedSenescedN
          Ryegrass.RemobilisableLuxuryN
          Ryegrass.RemobilisedLuxuryN
          Ryegrass.FixedN
          Ryegrass.RequiredLuxuryN
          Ryegrass.RequiredOptimumN
          Ryegrass.DemandSoilN
          sum(Ryegrass.UptakeN) as UptakeN
          Ryegrass.LitterN
          Ryegrass.SenescedRootN
          Ryegrass.ActualGrowthN
          Ryegrass.ActualGrowthNConc
          Ryegrass.WaterDemand
          sum(Ryegrass.WaterUptake) as WaterUptake
          Ryegrass.LiveDMTurnoverRate
          Ryegrass.DeadDMTurnoverRate
          Ryegrass.StolonDMTurnoverRate
          Ryegrass.RootDMTurnoverRate
          Ryegrass.TotalLAI
          Ryegrass.GreenLAI
          Ryegrass.DeadLAI
          Ryegrass.GlfTemperature
          Ryegrass.GlfWater
          Ryegrass.GlfN
          Ryegrass.HarvestableWt
          Ryegrass.HarvestedWt
          Ryegrass.HarvestedFraction
          Ryegrass.HarvestedN
          Ryegrass.HerbageDigestibility
          [CutRotation].Script.CutResidualWt[0] as RyegrassCutResidual
      Report Rep03whiteclover: EventNames=[Clock].EndOfDay
        VariableNames:
          [Clock].Today
          WhiteClover.Name
          WhiteClover.CropType
          WhiteClover.TotalWt
          WhiteClover.AboveGroundWt
          WhiteClover.BelowGroundWt
          WhiteClover.StandingWt
          WhiteClover.StandingLiveWt
          WhiteClover.StandingDeadWt
          WhiteClover.LeafWt
          WhiteClover.StemWt
          WhiteClover.StolonWt
          WhiteClover.RootWt
          WhiteClover.LeafStage1Wt
          WhiteClover.LeafStage2Wt
          WhiteClover.LeafStage3Wt
          WhiteClover.LeafStage4Wt
          WhiteClover.StemStage1Wt
          WhiteClover.StemStage2Wt
          WhiteClover.StemStage3Wt
          WhiteClover.StemStage4Wt
          WhiteClover.StolonStage1Wt
          WhiteClover.StolonStage2Wt
          WhiteClover.StolonStage3Wt
          WhiteClover.PotCarbonAssimilation
          WhiteClover.CarbonLossRespiration
          WhiteClover.GrossPotentialGrowthWt
          WhiteClover.NetPotentialGrowthWt
          WhiteClover.PotGrowthWt_Wstress
          WhiteClover.ActualGrowthWt
          WhiteClover.LitterWt
          WhiteClover.RootSenescedWt
          WhiteClover.TotalN
          WhiteClover.StandingN
          WhiteClover.LeafN
          WhiteClover.StemN
          WhiteClover.StolonN
          WhiteClover.RootN
          WhiteClover.LeafStage1N
          WhiteClover.LeafStage2N
          WhiteClover.LeafStage3N
          WhiteClover.LeafStage4N
          WhiteClover.StemStage1N
          WhiteClover.StemStage2N
          WhiteClover.StemStage3N
          WhiteClover.StemStage4N
          WhiteClover.StolonStage1N
          WhiteClover.StolonStage2N
          WhiteClover.StolonStage3N
          WhiteClover.LeafNConc
          WhiteClover.StemNConc
          WhiteClover.StolonNConc
          WhiteClover.RootNConc
          WhiteClover.LeafStage1NConc
          WhiteClover.LeafStage2NConc
          WhiteClover.LeafStage3NConc
          WhiteClover.LeafStage4NConc
          WhiteClover.StemStage1NConc
          WhiteClover.StemStage2NConc
          WhiteClover.StemStage3NConc
          WhiteClover.StemStage4NConc
          WhiteClover.StolonStage1NConc
          WhiteClover.StolonStage2NConc
          WhiteClover.StolonStage3NConc
          WhiteClover.RemobilisableSenescedN
          WhiteClover.RemobilisedSenescedN
          WhiteClover.RemobilisableLuxuryN
          WhiteClover.RemobilisedLuxuryN
          WhiteClover.FixedN
          WhiteClover.RequiredLuxuryN
          WhiteClover.RequiredOptimumN
          WhiteClover.DemandSoilN
          sum(WhiteClover.UptakeN) as UptakeN
          WhiteClover.LitterN
          WhiteClover.SenescedRootN
          WhiteClover.ActualGrowthN
          WhiteClover.ActualGrowthNConc
          WhiteClover.LiveDMTurnoverRate
          WhiteClover.DeadDMTurnoverRate
          WhiteClover.StolonDMTurnoverRate
          WhiteClover.RootDMTurnoverRate
          WhiteClover.TotalLAI
          WhiteClover.GreenLAI
          WhiteClover.DeadLAI
          WhiteClover.GlfTemperature
          WhiteClover.GlfWater
          WhiteClover.GlfN
          WhiteClover.HarvestableWt
          WhiteClover.HarvestedWt
          WhiteClover.HarvestedFraction
          WhiteClover.HarvestedN
          [CutRotation].Script.CutResidualWt[1] as WhiteCloverCutResidual
      Report Rep03layers: EventNames=[Clock].EndOfDay
        VariableNames:
          [Clock].Today
          Sward.Name
          [Soil].Thickness
          Ryegrass.RootWtFraction
          Ryegrass.RLD
          Ryegrass.NitrogenAvailable
          Ryegrass.NitrogenUptake
          Ryegrass.SoilAvailableWater
          Ryegrass.WaterUptake
      Report Rep04massbalance: same as Test3.Field.Rep04massbalance
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