folder Simulations: version=36; creator=Apsim 7.8-r3936
  simulation OneSpecies
    clock
      start_date = 01/07/2000  # Enter the start date of the simulation
      end_date = 30/06/2002  # Enter the end date of the simulation
    metfile met: filename=%apsim%X\Tests\WeatherFiles\Ruakura.met
    summaryfile
    area AgPastureClassic
      folder Managers
        manager2 HarvestingAgPasture
          # Setting up a harvesting rotation for AgPasture
          CutPasture_StartDate = 01/01/1900  # Enter the date to start the rotation (dd/mm/yyyy)
          CutPasture_EndDate = 31/12/2100  # Enter the date to end the rotation (dd/mm/yyyy)
          # Parameters defining the interval and amount to harvest
          CutTriggerType = Fixed interval  # Choose the trigger type, defines when harvests can occur
          Intervals2Cut = 21  # If trigger is interval between harvests, enter its value (days)
          UpperThresholds = 2800  # If trigger is the sward standing biomass, enter the amount (kgDM/ha)
          RemoveAmountType = All herbage down to residual DM  # Choose how the amount to harvest will be defined
          Amounts2Cut = 185  # If setting an amount, enter the value to harvest at each cut (kgDM/ha)
          MinimumFraction = 0.33  # For target amount, enter the fraction of the target below which harvest is ignored (0-1)
          LowerThresholds = 1500  # Enter the minimum residual standing biomass after cut (kgDM/ha)
          # Management of harvested material
          ResidueTreatmentType = Return as residue  # Choose the treatment type for the harvested material
          DMRemovalOption = 1.0  # Enter fraction of DM that is removed from the field (0-1)
          FracN2Remove = 1.0  # Enter fraction of N that is removed from the field (0-1)
          # If returning residues as dung & urine
          UrineDepth = 300  # Enter the depth down to which urine will apllied (mm)
          NinDungChoice = Set the proportion returned  # Choose how the N content in dung is defined
          FracN2Dung = 0.4  # If setting the proportion of N returned in dung, enter the value (0-1)
          CNratioDung = 0.0  # If defining the C:N ratio of dung, enter the value (approx. 10 to 20)
```csharp
using System;
using ModelFramework;

//This manager sets up a cut/grazing rotation for AgPasture. It also handles the return of harvested material.
// The rotation is valid between two given dates only, these don't need to be bounded to the simulation dates (start date is set to simulation start date, if prior to it).
// Harvest is done on above ground standing DM, i.e. leaves plus stem/sheath (dead and green).
// Whether harvest can happen or not is evaluated in the first day (always), and thereof evaluations follow a trigger, varying for rotation types.
// + Cut trigger types:
//  - Fixed interval:
//     Cut is allowed at given days only (set by start rotation date and then at regular intervals);
//     Cut happens if amount to remove is set and/or if existing DM is greater than ResidualDM;
//     Cut is only allowed on the date selected, 'Can_Cut' is set to "no" at the end of the day;
//  - Target interval:
//     Cut is allowed from given days (begins at start rotation date and at regular intervals after last cut);
//     Cut happens if amount to remove is set and/or if existing DM is greater than ResidualDM;
//     Cut is allow from the date selected until something is harvested, only then 'Can_Cut' is set to "no";
//  - Target standing biomass:
//     Cut is allowed when existing DM reaches the target value;
//     Cut always happens, unless UpperThreshold is bellow the LowerThreshold (i.e. residual DM);
//     Cut is allowed until something is harvested (according to remove options), 'Can_Cut' is then set to "no";
//
// + Remove amount options:
//  - Set amount: The amount to remove is fixed, if this amount is not available, no cut is performed
//  - Target amount: The amount is the smallest of the given target value and difference between existing DM and the LowerThreshold (Residual DM);
//   » To avoid harvest of very small amounts a minimum fraction of the target value can be defined. If the existing amount is below that fraction the harvest is ignored.
//  - Given amounts down to residual DM: Amount to remove in a given day is given (which is limited to the difference to the minimum residual DM). However, harvest only stops
//    when standing DM reaches the LowerThreshold.  The minimum fraction to remove is also applied here to avoid very small amounts;
//  - All herbage down to residual DM: Amount to remove is the difference between existing DM and minimum residual DM (LowerThreshold);
//
// + Residue management options:
//  - Return as residue: A fraction of the DM harvested (plus the N on it) is added as grass residue to the surfaceOM module;
//  - Return as dung & urine: A fraction of the amount harvested is returned to the soil as evenly distributed urine (urea) and dung;
//     This is a very simplified approach where the fractions of DM (i.e. carbon) and N to be removed are set separately. 
//     The fraction of dry matter (or carbon) to be removed can be set (0-1) or allowed to be calculated based on herbage digestibility.
//     The partition of N between urine and dung is set by the user by defining how N in dung is computed.
//     The DM and N to be returned as dung are added to surfaceOM 'RuminantDung_PastureFed'.
//     N urine is added as urea fertiliser, distributed from surface down to  a given depth. The proportion per layer decreases linearly with depth.
//  + Defining the N content in dung:
//    - Set proportion returned: A fraction of N not removed from the field is returned in the dung. The proportion returned as dung should be given.
//    - Define the C:N ratio: The C:N ratio for dung can be defined. Note that this option may alter the amount returned as urine (to ensure mass balance).

// » The values for few parameters can be entered as an array, these are interpreted as defining the rotation within a year, so the first value is assumed to be for 01/Jan,
//    the last value is for 31/Dec, and the values in between are spread evenly over the year. The value of the parameter for each day of the year is calculated 
//    dynamically by linear interpolation.  The parameters that can be set up as arrays are:
//    - Interval between harvests (Interval2Cut)
//    - The DM amount to trigger a harvest (UpperThreshold)
//    - The amount to remove on each harvest (Amount2Cut)
//    - The residual DM after harvest (LowerThreshold)

//-->  Last uptaded in: 01/Oct/2015 ..................

public class Script
{
   //Parameter variables:
   [Param] private DateTime CutPasture_StartDate;  //Date to start the cutting rotation
   [Param] private DateTime CutPasture_EndDate;    //Date to end cutting rotation

   [Param] private string CutTriggerType;          //The cut trigger type (Fixed interval,Target interval,Target standing biomass)
   [Param] private double[] Intervals2Cut;         //The interval between cuts, used if cut trigger type is by interval (days), (values will be interpolated using DoY)
   [Param] private double[] UpperThresholds;       //The standing biomass amount to trigger a cut, if cut type is target biomass (kg/ha, standing DM [leaf+stem/sheath]), (values will be interpolated using DoY)

   [Param] private string RemoveAmountType;        //The way to compute how much pasture is cut (Set amount,Target amount,Given amounts down to residual DM, All herbage down to residual DM)
   [Param] private double[] Amounts2Cut;           //The amount of DM to be removed at each cut, limited to residual DM (LowerThreshold) (kg/ha, DM above ground), (values will be interpolated using DoY)
   [Param] private double MinimumFraction;         //The minimum fraction of harvest amount that is meaningful, below which harvest is ignored (for target amount)
   [Param] private double[] LowerThresholds;       //The minimum residual DM amount left after cut (kg/ha, DM above ground), (values will be interpolated using DoY)

   [Param] private string ResidueTreatmentType;    //The treatment to the material cut (Return as residue,Return as dung & urine)
   [Param] private string DMRemovalOption;         //The option to define DM to remove (Based on herbage digestibility,type a fraction (0-1))
   [Param] private double FracN2Remove;            //Fraction of the N in the material cut that is removed from simulation (0-1)
   
   [Param] private double UrineDepth;              //The depth down to which urine will be applied (mm), proportion applied per layer decrease with depth
   [Param] private string NinDungChoice;           //The way N in dung is defined (Set proportion returned,Set CN ratio)
   [Param] private double FracN2Dung;              //The fraction of returned N that goes into dung, if return is as dung & urine (0-1)
   [Param] private double CNratioDung;             //The C:N ratio of dung, if return is as dung and urine (~10-20)

   //Links and events:
   [Link] private Component MySelf;
   [Link] private AgPasture MyAgPasture;
   [Link] private Fertiliser MyFertiliser;
   [Link] private SurfaceOM MySurfaceOM;
   
   //Variables read from other modules
   [Input] private DateTime Today;     //Today's date
   [Input] private double[] dlayer;    //Today's day of year

   //Outputs
   [Output][Units("")] public string Can_Cut;                  //Whether today is a harvesting day
   [Output][Units("")] public string Has_Cut;                  //Whether today's harvest was done
   [Output][Units("kg/ha")] public double harvested_dm;        //Pasture DM harvested today (kg/ha)
   [Output][Units("kgN/ha")] public double harvested_n;        //N harvested today
   [Output][Units("kg/ha")] public double removed_dm;          //DM removed from the paddock
   [Output][Units("kgN/ha")] public double removed_n;          //N removed from the paddock
   [Output][Units("kgN/ha")] public double returned_dm;        //DM returned to the paddock
   [Output][Units("kgN/ha")] public double returned_n;         //N returned to the paddock
   [Output][Units("kgN/ha")] public double NReturnedInDung;    //N returned as dung (SurfaceOM)
   [Output][Units("kgN/ha")] public double NReturnedInUrine;   //N returned as urine (urea)
   [Output][Units("kg/ha/day")] public double GrowthRateCalc;  //Average growth rate for this cut
   [Output][Units("days")] public int DaysAfterCut;            //Number of days after last harvest
   [Output][Units("kg/ha")] public double PreHarvestDM;        //Total standing DM (Leaf + Stem/Sheath) before cut
   [Output][Units("kg/ha")] public double PostHarvestDM;       //Total standing DM (Leaf + Stem/Sheath) after cut
   [Output][Units("kg/ha")] public double ResidualDM;          //Today's residual DM
   [Output][Units("kg/ha")] public double TriggerDM;           //Today's trigger DM
   [Output][Units("kg/ha")] public double HarvestAmount;       //Today's DM amount to harvest
   [Output][Units("days")] public int CutInterval;             //Todays cut interval

   //Internal variables
   private double FracDM2Remove;       //The fraction of DM to be removed from the simulation (0-1)   
   private bool CutIsAllowed;          //Whether cutting are allowed
   private int[] LowerThresholdDays;   //The DoY for each value of lower threshold
   private int[] UpperThresholdDays;   //The DoY for each value of upper threshold
   private int[] Amount2HarvestDays;   //The DoY for each amount to cut given
   private int[] CutIntervalDays;      //The DoY for each given cut interval
   private double[] FracLayer;         //The fraction of urine to be applied in each layer

   [EventHandler()]
   public void OnInitialised()
   {
      //Set the arrays with days
      LowerThresholdDays = setDays(LowerThresholds.Length);
      UpperThresholdDays = setDays(UpperThresholds.Length);
      Amount2HarvestDays = setDays(Amounts2Cut.Length);
      CutIntervalDays = setDays(Intervals2Cut.Length);
      
      //Reset variables
      CutInterval = (int) InterpolateVals(Today.DayOfYear, CutIntervalDays, Intervals2Cut);
      ResidualDM = InterpolateVals(Today.DayOfYear, LowerThresholdDays, LowerThresholds);
      TriggerDM = InterpolateVals(Today.DayOfYear, UpperThresholdDays, UpperThresholds);
      HarvestAmount = InterpolateVals(Today.DayOfYear, Amount2HarvestDays, Amounts2Cut);
      DaysAfterCut = CutInterval - 1;
      CutIsAllowed = false;
      Can_Cut = "no";
      Has_Cut = "no";

      //The fraction of DM to remove
      // - DMRemovalOption can be a value (0-1 = FracDM2Remove) or a string, which tell us that FracDM2Remove is based on digestibility
      if (DMRemovalOption.Contains("digestibility"))
      {
         FracDM2Remove = MyAgPasture.DefoliatedDigestibility;
      }
      else
      {
         try
         {
            FracDM2Remove = Convert.ToDouble(DMRemovalOption);
            if ((FracDM2Remove < 0.0) || (FracDM2Remove > 1.0))
            {
               throw new Exception("Fraction of DM to remove is out of bounds");
            }
         } 
         catch 
         {
            throw new Exception("Fraction of DM to remove is not valid");
         }
      }
      
      //The fraction of N to remove
      if ((FracN2Remove < 0.0) || (FracN2Remove > 1.0))
      {
         throw new Exception("Fraction of N to remove is out of bounds");
      }
      
      //How to return residues (DM and N)
      if (ResidueTreatmentType.Contains("urine")) 
      {
         if (NinDungChoice.Contains("proportion")) 
         {
            if ((FracN2Dung < 0.0) || (FracN2Dung > 1.0))
            {
               throw new Exception("Proportion of N to return as dung is out of bounds");
            }
         } 
         else if (NinDungChoice.Contains("CN ratio")) 
         {
            if ((CNratioDung < 0.0) || (CNratioDung > 50.0))
            {
               throw new Exception("C:N ratio of dung is out of bounds");
            }
         } 
         else
         {
            throw new Exception("Choice for setting N content in dung is not valid");
         }
      }

      //compute the fraction of urine to be aplied per layer
      if (ResidueTreatmentType.Contains("urine"))
      {
         FracLayer = new double[dlayer.Length];
         double DepthFromSurface = 0.0;
         double dltZ = 0.0;
         for (int z = 0; z < dlayer.Length;z++)
         {
            if(DepthFromSurface < UrineDepth)
            {
               dltZ = Math.Min(dlayer[z], UrineDepth - DepthFromSurface);
               FracLayer[z] = 2 * dltZ * (1 - ((DepthFromSurface + 0.5 * dltZ) / UrineDepth)) / UrineDepth;
            }
            DepthFromSurface += dlayer[z];
         }
      }
      //Check whether choices are allowed and prepare messages     
      string myMessage1;
      string myMessage2 = "     remove ";
      switch (CutTriggerType.ToLower())
      {
         case "fixed interval":
            if (RemoveAmountType.ToLower().Contains("amount")) 
            {
               if (RemoveAmountType.ToLower().Contains("residual")) 
               {
                  myMessage2 += RemoveAmountType.ToLower() + " (amount = " + HarvestAmount.ToString("#0") + " kg/ha/day, residual DM = " + ResidualDM.ToString("#0") + " kg/ha)";
               }
               else
               {
                  myMessage2 += RemoveAmountType.ToLower() + " = " + HarvestAmount.ToString("#0") + " kg/ha";
               }
            } 
            else
            {
               myMessage2 += RemoveAmountType.ToLower() + " (" + ResidualDM + " kg/ha)";
            }
            myMessage1 = ", cut only every " + CutInterval.ToString() + " days";
            break;
         case "target interval":
            if (RemoveAmountType.ToLower().Contains("amount"))
            {               if (RemoveAmountType.ToLower().Contains("residual")) 
               {
                  myMessage2 += RemoveAmountType.ToLower() + " (amount = " + HarvestAmount.ToString("#0") + " kg/ha/day, residual DM = " + ResidualDM.ToString("#0") + " kg/ha)";
               }
               else

               {
                  myMessage2 += RemoveAmountType.ToLower() + " = " + HarvestAmount.ToString("#0") + " kg/ha";
               }
            }
            else 
            {
               myMessage2 += RemoveAmountType.ToLower() + " = (" + ResidualDM + " kg/ha)";
            }
            myMessage1 = ", cut every " + CutInterval.ToString() + " days, or when possible";
            break;
         case "target standing biomass":
            if (RemoveAmountType.ToLower().Contains("amount")) 
            {
               if (RemoveAmountType.ToLower().Contains("residual")) 
               {
                  myMessage2 += RemoveAmountType.ToLower() + " (amount = " + HarvestAmount.ToString("#0") + " kg/ha/day, residual DM = " + ResidualDM.ToString("#0") + " kg/ha)";
               }
               else
               {
                  myMessage2 += RemoveAmountType.ToLower() + " = " + HarvestAmount.ToString("#0") + " kg/ha";
               }
            }
            else 
            {
               myMessage2 += RemoveAmountType.ToLower() + " = (" + ResidualDM + " kg/ha)";
            }
            myMessage1 = ", cut when DM reaches " + TriggerDM + " kgDM/ha";
            break;
         default:
            throw new Exception("Cut trigger type is not valid");
      }

      //write messages on summary file
      Console.WriteLine("");
      Console.WriteLine("   Harvesting rotation for AgPasture initialised");
      Console.WriteLine("     rotation rule valid between " + CutPasture_StartDate.ToString("dd/MM/yyyy") + " and " + CutPasture_EndDate.ToString("dd/MM/yyyy"));
      Console.WriteLine("     rotation type: " + CutTriggerType.ToLower() + myMessage1);
      Console.WriteLine(myMessage2);
      if (DMRemovalOption.Contains("digestibility"))
      {
         myMessage1 = DMRemovalOption.ToLower();
      }
      else
      {
         myMessage1 = ((1.0 - FracDM2Remove) * 100).ToString("#0.0") + "%";
      }
      Console.WriteLine("     fraction of harvested DM to " + ResidueTreatmentType.ToLower() + ": " + myMessage1);
      myMessage1 = ((1.0 - FracN2Remove) * 100).ToString("#0.0") + "%";
      if (FracN2Remove < 0.999999)
      {
         myMessage1 += " (" + ((1.0 - FracN2Dung) * 100).ToString("#0.0") + "% of it as urine)";
      }
      Console.WriteLine("     fraction of harvested N to " + ResidueTreatmentType.ToLower() + ": " + myMessage1);
      if (ResidueTreatmentType.Contains("urine"))
      {
         Console.WriteLine("     proportion of urine N to be added in each layer:");
         myMessage1 = FracLayer[0].ToString("0.000");
         for (int z = 1;z < dlayer.Length;z++)
         {
            myMessage1 += ", " + FracLayer[z].ToString("0.000");
         }
         Console.WriteLine("      " + myMessage1);
      }
      Console.WriteLine("");
   }

   [EventHandler()]
   public void OnPrepare()
   {
      double Amount2Harvest;
      double AmountHarvestable;
      double ExistingDM;

      //Reset variables:
      Has_Cut = "no";
      harvested_dm = 0.0;
      harvested_n = 0.0;
      removed_dm = 0.0;
      removed_n = 0.0;
      returned_dm = 0.0;
      returned_n = 0.0;
      GrowthRateCalc = 0.0;
      NReturnedInDung = 0.0;
      NReturnedInUrine = 0.0;
      DaysAfterCut = DaysAfterCut + 1;
      CutInterval = (int) InterpolateVals(Today.DayOfYear, CutIntervalDays, Intervals2Cut);
      ResidualDM = InterpolateVals(Today.DayOfYear, LowerThresholdDays, LowerThresholds);
      TriggerDM = InterpolateVals(Today.DayOfYear, UpperThresholdDays, UpperThresholds);
      HarvestAmount = InterpolateVals(Today.DayOfYear, Amount2HarvestDays, Amounts2Cut);
      ExistingDM = MyAgPasture.StandingPlantWt;

      //Decide whether cut is allowed:
      if ((Today.Date >= CutPasture_StartDate.Date) && (Today.Date <= CutPasture_EndDate.Date))
      {
         switch (CutTriggerType.ToLower())
         {
            case "fixed interval":
               //Allways send an CutIsAllowed if interval is right, it will be reset in the end of the day
               if (DaysAfterCut >= CutInterval)
               {
                  CutIsAllowed = true;
               }
               else
               {
                  CutIsAllowed = false;
                  //always reset CutIsAllowed
               }
               break;
            case "target interval":
               //Allways send an CutIsAllowed if interval is right, it will be reset only if cut actually happens (depends on amount type)
               if (DaysAfterCut >= CutInterval)
               {
                  CutIsAllowed = true;
               }
               break;
            case "target standing biomass":
               //Send an CutIsAllowed if existing DM amount is above the target (TriggerDM/UpperThreshold), it will be reset if cut actually happens
               if (ExistingDM >= TriggerDM)
               {
                  CutIsAllowed = true;
               }
               break;
         }

         //The use of these avoid (or at least reduces) problems when two managers are used in the same simulation
         if (CutIsAllowed)
         {
            Can_Cut = "yes";
         }
         else
         {
            Can_Cut = "no";
         }
         
         //Decide how much to cut:
         if (CutIsAllowed)
         {
            PreHarvestDM = MyAgPasture.StandingPlantWt;

            switch (RemoveAmountType.ToLower())
            {
               case "set amount":
                  Amount2Harvest = HarvestAmount;
                  if (CutTriggerType.ToLower() == "fixed interval")
                  {
                     AmountHarvestable = PreHarvestDM;
                  }
                  else
                  {
                     AmountHarvestable = Math.Max(0.0, PreHarvestDM - ResidualDM);
                  }
                  break;
               case "target amount":
                  Amount2Harvest = Math.Min(Math.Max(MinimumFraction * HarvestAmount, PreHarvestDM - ResidualDM), HarvestAmount);
                  AmountHarvestable = Math.Max(0.0, PreHarvestDM - ResidualDM);
                  break;
               case "given amounts down to residual dm":
                  Amount2Harvest = Math.Min(Math.Max(MinimumFraction * HarvestAmount, PreHarvestDM - ResidualDM), HarvestAmount);
                  AmountHarvestable = Math.Max(0.0, PreHarvestDM - ResidualDM);
                  break;
               case "all herbage down to residual dm":
                  Amount2Harvest = Math.Max(0.0, PreHarvestDM - ResidualDM);
                  AmountHarvestable = Math.Max(0.0, PreHarvestDM - ResidualDM);
                  break;
               default:
                  throw new Exception("Option to compute DM amount to harvest is not valid");
            }

            //Decide whether cut actually happens:
            if ((AmountHarvestable >= Amount2Harvest))
            {
               CutPasture(Amount2Harvest);
               HandleResidues();
               //reset cut variables
               DaysAfterCut = 0;
               Has_Cut = "yes";
               GrowthRateCalc = harvested_dm / DaysAfterCut;
               PostHarvestDM = MyAgPasture.StandingPlantWt;
               if (RemoveAmountType.Contains("amount"))
               { // check whether reamining amount is significant
                  if (Math.Abs(PostHarvestDM - ResidualDM) < MinimumFraction * HarvestAmount)
                  {  
                     CutIsAllowed = false;
                  }
               }
               else
               {
                  CutIsAllowed = false;
               }
            }
         }
         else
         {
            Amount2Harvest = 0.0;
            AmountHarvestable = 0.0;
         }
      }
   }


   private void CutPasture(double Amount2Harvest)
   {
      // -- Cutting pasture ----------------------------------------------------------------------------

      GrazeType CutData = new GrazeType();
      CutData.sender = MySelf.Name;
      CutData.amount = (float) Amount2Harvest;
      CutData.type = "SetRemoveAmount";
      MyAgPasture.Graze(CutData);
      harvested_dm = MyAgPasture.HarvestWt;
      harvested_n = MyAgPasture.HarvestN;

      //Let user know (via summary) that a cut was made
      Console.WriteLine(Today.ToString("dd MMMM yyyy") + " (Day of year=" + Today.DayOfYear.ToString() + "), " + MySelf.Name + ":");
      Console.WriteLine("     Removing " + harvested_dm.ToString("#0") + "kg DM/ha, with " + harvested_n.ToString("#0.0") + "kg N/ha");
   }

   
   private void HandleResidues()
   {
      // -- Residue management -------------------------------------------------------------------------
      
      if (DMRemovalOption.Contains("digestibility"))
      {
         FracDM2Remove = MyAgPasture.DefoliatedDigestibility;
      }
      removed_dm = harvested_dm * FracDM2Remove;
      removed_n = harvested_n * FracN2Remove;
      returned_dm = harvested_dm - removed_dm;
      returned_n = harvested_n - removed_n;

      if (returned_dm < 0.0)
      {
         throw new Exception("Return_DM value is negative");
      }
      if (returned_n < 0.0)
      {
         throw new Exception("Return_N value is negative");
      }

      if (ResidueTreatmentType.ToLower() == "return as residue")
      {
         if (FracDM2Remove < 1.0)
         {
            BiomassRemovedType SOMData = new BiomassRemovedType();
            SOMData.crop_type = "grass";
            SOMData.dm_type = new string[] { SOMData.crop_type };
            SOMData.dlt_crop_dm = new float[] { (float) returned_dm };
            SOMData.dlt_dm_n = new float[] { (float) returned_n };
            SOMData.fraction_to_residue = new float[] { 1.0F };
            MySurfaceOM.BiomassRemoved(SOMData);            
         }
      }
      else if (ResidueTreatmentType.ToLower() == "return as dung & urine")
      {
         // It is advised that dung and urine return should be done using another manager or modules, such as 'UrinePatch' 

         if (NinDungChoice.Contains("proportion"))
         {
            NReturnedInDung = returned_n * FracN2Dung;
         }
         else if (NinDungChoice.Contains("CN ratio"))
         {
            NReturnedInDung = returned_dm / CNratioDung;
         }
         NReturnedInUrine = Math.Max(0.0, returned_n - NReturnedInDung);

         if (NReturnedInDung > returned_n)
         {
            throw new Exception("Amount of N to return as dung is larger than total return, check proportion or CN ratio");
         }

         if ((returned_dm > 0.0) || (NReturnedInDung > 0.0))
         {
            BiomassRemovedType SOMData = new BiomassRemovedType();
            SOMData.crop_type = "RuminantDung_PastureFed";
            SOMData.dm_type = new string[] { SOMData.crop_type };
            SOMData.dlt_crop_dm = new float[] { (float) returned_dm };
            SOMData.dlt_dm_n = new float[] { (float) NReturnedInDung };
            SOMData.fraction_to_residue = new float[] { 1.0F };
            MySurfaceOM.BiomassRemoved(SOMData);            
         }
         
         if (NReturnedInUrine > 0.0)
         {
            FertiliserApplicationType UrineData = new FertiliserApplicationType();
            UrineData.Amount = (float) NReturnedInUrine;
            UrineData.Depth = 10;   // mm
            UrineData.Type = "urea_n";
            MyFertiliser.Apply(UrineData);
         }
      }
      else
      {
         throw new Exception("Residue management type is not valid");
      }
   }

   private int[] setDays(int NumDates)
   {
      //Define the day of year for each value on am array, given the arra's length - first value, day=1; last value day = 365; dates in between spread evenly (rounded)
      int[] xArray;
      if (NumDates < 366)
      {
         xArray = new int[NumDates];
         xArray[0] = 1;
         if (NumDates > 1)
         {
            xArray[NumDates - 1] = 365;
            if (NumDates > 2)
            {
               for (int i = 1; i < NumDates - 1; i++)
               {
                  xArray[i] = 365 * i / (NumDates);
               }
            }
         }
      }
      else
      {
         throw new Exception("Number of items on CoverTarget greater than maximum allowed (365)");
      }
      
      return xArray;
   }

   private double InterpolateVals(int my_x, int[] xArray, double[] yArray)
   {
      //Find out the value correspondig to my_x in the function described by the x and y arrays
      double my_y = 0.0;
      int iN = xArray.Length - 1;
      if (my_x <= xArray[0])
      {
         //values below x[0] are set to y[0]
         my_y = yArray[0];
      }
      else if (my_x >= xArray[iN])
      {
         //value above x(n) are set to y(n)
         my_y = yArray[iN];
      }
      else
      {
         //find the nearest neighbours and interpolate (linear)
         for (int i = 1; i <= iN; i++)
         {
            if (my_x <= xArray[i])
            {
               my_y = yArray[i - 1] + ((my_x - xArray[i - 1]) * (yArray[i] - yArray[i - 1]) / (xArray[i] - xArray[i - 1]));
               i = xArray.Length;
            }
         }
      }
      
      return my_y;
   }
}
```
        manager2 FertOnSoilNCriteria
          # Fertiliser application based on Soil N amount
          FertAllowed = yes  # Turn ferliser applications on?
          FertDepth2SoilN = 500  # Depth to calculate available soil N (mm)
          FertCriticalSoilN = 5  # Minimum available N, triggers an application (kgN/ha)
          FertNAmount = 25  # Amount of N fertiliser for each application (kgN/ha)
          FertType = urea_n  # Type of N fertiliser to apply
          FertApplicationDepth = 1  # Depth at which to apply the fertiliser (mm)
          FertMinimumDays = 15  # Minimum period between applications (days)
```vb
Imports System
Imports ModelFramework

Public Class Script 
   <Link()> Dim MyPaddock As Paddock
   <Link()> Dim Fert As Fertiliser

   'Parameters - user inputs from the Properties tab
   <Param> Private FertAllowed As String           'Whether fertilisation is allowed at all
   <Param> Private FertDepth2SoilN As Double       'Depth in the soil to calculate the N storage
   <Param> Private FertCriticalSoilN As Double     'Minimum soil N, below which fertiliser application is triggered
   <Param> Private FertNAmount As Double           'Amount of N fertiliser per application
   <Param> Private FertType As String              'Type of fertiliser to apply
   <Param> Private FertApplicationDepth As Double  'Depth in the soil that the fertilser will be applied
   <Param> Private FertMinimumDays As Double       'Minimum interval between appplications

   'Inputs - got by this Manager from elsewhere in APSIM
   <Input> Private Today As DateTime            'Today's date from APSIM 
   <Input> Private dlayer As Double()           'Array of soil layer thicknesses - for calculation of mineral N in the soil
   <Input> Private no3 As Double()              'Array of nitrate-N (kg N /ha) for each soil layer - for calculation of mineral N in the soil
   <Input> Private nh4 As Double()              'Array of ammonium-N (kg N /ha) for each soil layer - for calculation of mineral N in the soil
   <Input> Private urea As Double()             'Array of urea-N (kg N /ha) for each soil layer - for calculation of mineral N in the soil

   'Outputs - calculated by this Manager and available to be output by the user
   <Output> Private TopMineralN As Double       'Mineral-N stored in the soil to a depth of FertDepth2SoilN

   'Other variables that are calculated but not needed for outputs
   Private LayerWeights As Double()             'Weigthing of each layer for FertCriticalSoilN calculation
   Private lastApplicationDate As DateTime
   Private fertiliserIsAllowed As Boolean
   Private nLayers As Integer
   Private daysSinceLastApplication As Double

   <EventHandler()> Public Sub OnInit2()
      '"OnInit2" is an event handler gets called once at the start of the simulation 

      fertiliserIsAllowed = (FertAllowed.ToLower = "yes")
      nLayers = dLayer.Length

   End Sub

   <EventHandler()> Public Sub OnPrepare()
      '"OnPrepare" is an event handler gets called once at the start of every day (before Prepare and Post) 

      daysSinceLastApplication = (Today - lastApplicationDate).TotalDays

      ' get the N stored in the soil
      Dim depthFromSurface As Double = 0.0
      Dim fracLayer As Double = 0.0
      TopMineralN = 0.0
      For layer As Integer = 0 To nLayers
         fracLayer = Math.Min(1.0, (FertDepth2SoilN - depthFromSurface) / dlayer(layer))
         TopMineralN += (NO3(layer) + NH4(layer) + Urea(layer)) * fracLayer
         depthFromSurface += dlayer(layer)
         If (depthFromSurface >= FertDepth2SoilN)
            layer = nLayers
         End If
      Next

      ' Check whether a fertiliser application is due
      If (fertiliserIsAllowed And daysSinceLastApplication >= FertMinimumDays And TopMineralN <= FertCriticalSoilN) Then
         Fert.Apply(FertNAmount, FertApplicationDepth, FertType)
         lastApplicationDate = Today
      End If

   End Sub

End Class
```
        manager2 CentrePivotIrrigation
          # Centre Pivot Irrigation Manager
          AllowIrrigation = no  # Turn irrigation on?
          # General irrigation parameters
          Irrigation_start_date = 15-Sep  # Start of irrigation season (dd-mmm)
          Irrigation_end_date = 30-May  # End of irrigation season (dd-mmm)
          DepthToCalcPAW = 300  # Enter the soil depth to which water deficit is computed (mm)
          CritRainToPause = 30  # Critical rainfall - amount over 3 days after which irrigation is paused (mm)
          DaysToPauseOnCritRain = 3  # Number of days irrigation is paused once critical rainfall is reached (days)
          IrrigSetup = specify  # Select whether irrigation setup is specified or calculated internally
          # Irrigation setup (if not to calculate)
          IrrigTrigger = 30  # Soil water deficit at which irrigation starts (mm)
          IrrigUpperThreshold = 0  # Soil water deficit at which irrigation stops, daily amount is added regardless (mm)
          IrrigAmount = 6  # Amount of irrigation to apply (mm/day)
          IrrigDuration = 1440  # Duration of each irrigation event (min)
          IrrigReturn = 1  # Irrigation return period (days)
          IrrigEfficiency = 100  # Irrigation efficiency (%)
```vb
Imports System
Imports ModelFramework

'This manager applies irrigation following rules mimicking a centre-pivot management.
' Irrigation parameters can be given or be left to be calculated by the module (based on the soil PAW)

'-->  Last uptaded in: 15/Nov/2014 ..................


Public Class Script 
   
   'Parameter variables:
   <param> Private AllowIrrigation As String                   'Indicates whether irrigation is on (yes) or off (no)
   <param> Private Irrigation_start_date As String             'Start of the irrigation season (dd-mmm)
   <param> Private Irrigation_end_date As String               'End of the irrigation season (dd-mmm)
   <param> Private DepthToCalcPAW As Double                    'Depth to consider plant available water, and deficit (mm)
   <param> Private CritRainToPause As Double                   'Value of rain (sum over 3 days) when irrigation is paused (mm)
   <param> Private DaysToPauseOnCritRain As Double             'Number of days irrigations is paused when CritRain is reached
   <param> Private IrrigSetup As String                        'Define wheter the irrgation parameters are define by user of calculated
   <param> Private IrrigTrigger As Double                      'User defined irrigation trigger (mm)
   <param> Private IrrigUpperThreshold As Double               'User defined water deficit at which irrigation stops, daily amount is added regardless (mm):
   <param> Private IrrigAmount As Double                       'User defined irrigation amount (mm)
   <param> Private IrrigDuration As Double                     'User defined duration of irrigation (minutes)
   <param> Private IrrigReturn As Double                       'User defined irrigation return period (days)
   <param> Private IrrigEfficiency As Double                   'User defined irrigation efficiency (%)

   'Link to other modules:
   <Link> Private Irrigator As Irrigation   
   
   'Variables read from other modules
   <Input> Private today As DateTime                           'Today's date
   <Input> Private dlayer As Double()                          'Thickness of soil layers (mm)
   <Input> Private rain As Double                              'Rainfall (mm)
   <Input> Private sw_dep As Double()                          'Soil water content (mm)
   <Input> Private dul_dep As Double()                         'Soil water content at DUL (mm)
   <Input> Private ll15_dep As Double()                        'Soil water content at LL15 (mm)

   'Output variables
   <Output><Units("mm")> Public SoilWaterDeficit As Double          'Soil water deficit (mm)
   <Output><Units("days")> Public DaysAfterIrrigation As Double     'The number of days after irrigation was applied
   <Output><Units("mm")> Public SoilPAWforIrrigation As Double      'The soil plant available water (mm)
   <Output><Units("mm")> Public IrrigationTrigger As Double         'The soil water deficit that triggers irrigation (mm)
   <Output><Units("mm")> Public IrrigationUpperThreshold As Double  'The soil water deficit for stopping irrigation (mm)
   <Output><Units("days")> Public IrrigationReturnPeriod As Integer 'The return period for irrigation
   <Output><Units("mm")> Public IrrigationAmount As Double          'The amount of water to add in an irrigation event (mm/day)
   <Output><Units("min")> Public IrrigationDuration As Double       'The duration of each irrigation event (min/day)
   <Output><Units("%")> Public IrrigationEfficiency As Double       'The irrigaton efficiency (%)
   <Output><Units("mm")> Public RainOnPrevious3Days As Double       'The amount of rainfall over the previous 3 days
   <Output><Units("days")> Public Days2Pause As Double              'The number of days that irrigation is paused due to large rainfall

   'Internal variables
   Private StartDate As Date                                   'The date when irrigation start (in date format)
   Private EndDate As Date                                     'The date when irrigation finish (in date format)
   Private RainOnPreviousDays(2) As Double                     'Record the rain of the previous 3 days (mm)
   Private IrrigationRequired As Boolean
      
   <EventHandler()> Public Sub OnInitialised()

      'check the presence of the irrigation module and one of the soil modules
      Call CheckModules()
      
      'Put the dates into date format:
      StartDate = Date.Parse(Irrigation_start_date)
      EndDate = Date.Parse(Irrigation_end_date)

      DaysAfterIrrigation = IrrigationReturnPeriod
      IrrigationRequired = False
      
      'Zero rain on previous 3 days
      RainOnPrevious3Days = 0.0
      Array.Clear(RainOnPreviousDays, 0, RainOnPreviousDays.Length)

      'Calculate soil PAW for irrigation
      Dim DepthFromSurface As Double = 0
      SoilPAWforIrrigation = 0.0
      For z As Integer = 0 To dlayer.length - 1
         If DepthFromSurface < DepthToCalcPAW Then
            Dim FractionLayer As Double = math.Min(1, math.Max(0, DepthToCalcPAW - DepthFromSurface) / dlayer(z))
            '  if depth does not coincide with the end of the layer, only a corresponding fraction of it is used
            SoilPAWforIrrigation += (dul_dep(z) - ll15_dep(z)) * FractionLayer
         Else
            z = dlayer.Length - 1
         End If
         DepthFromSurface += dlayer(z)
         'DepthFromSurface = DepthFromSurface + dlayer(z)
      Next
      
      Dim IrrigParamType As String
      If IrrigSetup.ToLower = "specify" Then
         'Irrgation parameters are given by the user (no check is made on their values)
         IrrigParamType = "specified by user"
         IrrigationTrigger = IrrigTrigger
         IrrigationUpperThreshold = IrrigUpperThreshold
         IrrigationAmount = IrrigAmount
         IrrigationDuration = IrrigDuration
         IrrigationReturnPeriod = IrrigReturn
         IrrigationEfficiency = IrrigEfficiency
      Else 'IrrigSetup = "calculate"
         'Determine the irrigation parameters based on soil PAW and equipment type
         IrrigParamType = "calculated by manager"
         '  Assumptions:  -capacity to supply water is not limiting (pump and pipes are well dimensioned)
         '                -irrigation ideally starts when soil available water is half of PAW, but trigger is limited to between 10 and 40mm
         '                -amount of irrigation applied aim to fill up to 90% of PAW, but is limited between 10 and 30mm/day
         '                -rotation of the pivot is function of a fixed irrigation rate (7.5mm/day)
         '                -duration is function ofthe rotation period and nozzle size (5m = wetted span, equals ~1.5 degress at a radius of 200m)
         '                -the efficiency is function of PAW, set a minimum of 70% and a maximum of 90%, and the rate of change (slope) is 0.15.
         IrrigationTrigger = Math.Min(40.0, Math.Max(10.0, SoilPAWforIrrigation / 2.0))
         IrrigationAmount = Math.Max(10.0, Math.Min(30.0, 0.9 * SoilPAWforIrrigation - IrrigationTrigger))
         IrrigationUpperThreshold = Math.Max(1.0, SoilPAWforIrrigation - IrrigationAmount)
         IrrigationReturnPeriod = Math.Round(IrrigationAmount / 7.5)
         IrrigationDuration = IrrigationReturnPeriod * 1440 * (1.5 / 360)
         IrrigationEfficiency = Math.Min(90.0, 70.0 + 0.15 * SoilPAWforIrrigation)
      End If

      Console.WriteLine("")
      If AllowIrrigation.ToLower = "yes" Then
         Console.WriteLine("   Irrigation by centre-pivot is enabled")
         Console.WriteLine("     Parameters have been " & IrrigParamType & ":")
         Console.WriteLine("     - Irrigation season between " & StartDate.ToString("dd MMMM") & " and " & EndDate.ToString("dd MMMM"))
         Console.WriteLine("     - Soil layer depth for calculating irrigation is " & DepthToCalcPAW.ToString("0.0") & " mm")
         Console.WriteLine("        With plant available water of " & SoilPAWforIrrigation.ToString("0.0") & " mm")
         Console.WriteLine("     - Amount applied per irrigation event: " & IrrigationAmount.ToString("#0") & " mm")
         Console.WriteLine("     - Duration of each irrigation event: " & IrrigationDuration.ToString("#0") & " min")
         Console.WriteLine("     - Soil water deficit to trigger irrigation: " & IrrigationTrigger.ToString("#0") & " mm")
         Console.WriteLine("     - Return period for irrigation system: " & IrrigationReturnPeriod.ToString("#0") & " days")
         Console.WriteLine("     - Efficiency of the irrigation system: " & IrrigationEfficiency.ToString("0.0") & " %")

      Else
         Console.WriteLine("   Irrigation by centre-pivot is disabled")
      End If
      Console.WriteLine("")

   End Sub

   
   <EventHandler()> Public Sub OnPrepare()
      
      'Calc the soil water deficit     
      Dim DepthFromSurface As Integer = 0
      SoilWaterDeficit = 0.0         
      For z As Integer = 0 To dlayer.length - 1
         If DepthFromSurface < DepthToCalcPAW Then
            Dim FractionLayer As Double = math.Min(1, math.Max(0, DepthToCalcPAW - DepthFromSurface) / dlayer(z))
            '  if depth does not coincide with the end of the layer, only a corresponding fraction of it is used
            SoilWaterDeficit += Math.Max(0, math.Min(dul_dep(z) - ll15_dep(z), dul_dep(z) - sw_dep(z))) * FractionLayer
         Else
            z = dlayer.Length - 1
         End If
         DepthFromSurface += dlayer(z)
      Next
      SoilWaterDeficit = -SoilWaterDeficit
      
      'Decide whether to irrigate
      If AllowIrrigation.ToLower = "yes" Then
         'Calc the amount of rain today plus the previous two days
         RainOnPreviousDays(2) = RainOnPreviousDays(1)
         RainOnPreviousDays(1) = RainOnPreviousDays(0)
         RainOnPreviousDays(0) = rain
         RainOnPrevious3Days = RainOnPreviousDays(0) + RainOnPreviousDays(1) + RainOnPreviousDays(2)
            
         DaysAfterIrrigation = DaysAfterIrrigation + 1

         If isBetween(today, StartDate, EndDate) Then   'We are at the irrigation season     

            'Calc the number of days to pause irrigation after large rainfal events
            If RainOnPrevious3Days >= CritRainToPause Then
               Days2Pause = DaysToPauseOnCritRain
            Else
               Days2Pause = math.Max(0, Days2Pause - 1)
            End If

            'Check whether irrigation is paused
            If Days2Pause < 0.5 Then
               'Irrigation is not paused, check return period
               If DaysAfterIrrigation > IrrigationReturnPeriod Then    'Irrigation is allowed
                  'Check whether soil needs irrigation
                  If SoilWaterDeficit <= -IrrigationTrigger Then
                     IrrigationRequired = True
                  Else If SoilWaterDeficit > -IrrigationUpperThreshold Then
                     IrrigationRequired = False
                  End If

                  If IrrigationRequired Then
                     Dim MyIrrigation As IrrigationApplicationType = New IrrigationApplicationType
                     MyIrrigation.Amount = IrrigationAmount / (IrrigationEfficiency * 0.01)
                     MyIrrigation.time = ""
                     MyIrrigation.Duration = 0
                     MyIrrigation.source = New String() {}
                     MyIrrigation.Crop_Area = 0
                     MyIrrigation.NH4 = 0
                     MyIrrigation.NO3 = 0
                     MyIrrigation.CL = 0
                     Irrigator.Variable("irrigation_efficiency").Set(IrrigationEfficiency * 0.01)
                     Irrigator.Apply(MyIrrigation)
                     DaysAfterIrrigation = 1
                     Console.WriteLine(Today.ToString("dd MMMM yyyy") + " (Day of year=" + Today.DayOfYear.ToString + "), Irrigation:")
                     Console.WriteLine("  Centre-pivot is applying irrigation. Amount = " & MyIrrigation.Amount.ToString("0.0") & " mm")
                  End If
               End If
            End If
         End If
      End If
         
   End Sub

   
   Private Function isBetween(ByVal today As Date, ByVal startdate As Date, ByVal enddate As Date) As Boolean
      
      'Check whether today is between the start and the end dates.  This is needed because start and end dates don't have year
      
      Dim date1 As Date = New Date(today.Year, startdate.Month, startdate.Day)
      Dim date2 As Date = New Date(today.Year, enddate.Month, enddate.Day)

      If (date1 > date2) Then
         'Irrigation in the middle of the year - ex: summer in the northern hemisphere
         Return (today >= date1 Or today <= date2)
      Else
         'Irrigation in the end of the year - ex: summer in the southern hemisphere
         Return (today >= date1 And today <= date2)
      End If
      
   End Function


   Private Sub CheckModules()
   
      If Irrigator Is Nothing Then
         Throw New Exception("Centre pivot manager requires the presense of the irrigation module in the paddock")
      End If
      
   End Sub
   
End Class
```
      micromet
        soilalbedo = 0.23
        a_interception = 0
        b_interception = 0
        c_interception = 0
        d_interception = 0
      irrigation
        automatic_irrigation = off
        asw_depth = 600  # Depth to which ASW is calculated. (mm)
        crit_fr_asw = 0.5  # Fraction of ASW below which irrigation is applied (0-1.0)
        irrigation_efficiency = 1  # Efficiency of the irrigation. (0-1.0)
        irrigation_allocation = off  # Allocation limits
        allocation = 0  # Allocation in mm
        default_no3_conc = 0  # Nitrate concentration (ppm N)
        default_nh4_conc = 0  # Ammonium concentration (ppm N)
        default_cl_conc = 0  # Chloride concentration (ppm Cl)
      fertiliser
      surfaceom SurfaceOrganicMatter
        PoolName = AgPasture  # Organic Matter pool name
        type = grass  # Organic Matter type
        mass = 1000  # Initial surface residue (kg/ha)
        cnr = 40  # C:N ratio of initial residue
        standing_fraction = 0  # Fraction of residue standing
      Soil SoilLismore: SoilType=NZ_Sedimentary; LocalName=Lismore; Site=Winchmore; NearestTown=Ashburton; Region=Canterbury; Country=New Zealand; NaturalVegetation=0; ApsoilNumber=0; Latitude=-48.48; Longitude=0; LocationAccuracy=0; YearOfSampling=0; DataSource=published soil profile description (as an example)
        Analysis: PHUnits=Water; BoronUnits=HotWater
          Thickness  Rocks  PH  CEC   ParticleSizeSand  ParticleSizeSilt  ParticleSizeClay
          150        0      6   12.5  15                65                20
          150        0      6   10    20                65                15
          200        10     6   9     25                63                12
          150        40     6   5     35                57                8
          250        60     6   4     40                54                6
          300        70     6   4     40                55                5
          300        70     6   4     40                55                5
        Water
          Thickness  BD    AirDry  LL15  DUL   SAT   KS
          150        1.3   0.05    0.15  0.36  0.45  5000
          150        1.35  0.12    0.14  0.34  0.43  2500
          200        1     0.06    0.06  0.19  0.25  3000
          150        0.53  0.02    0.02  0.07  0.15  10000
          250        0.31  0.01    0.01  0.04  0.11  17500
          300        0.3   0.01    0.01  0.03  0.11  20000
          300        0.3   0.01    0.01  0.03  0.11  20000
          SoilCrop agpasture: LL=[0.15, 0.14, 0.06, 0.02, 0.01, 0.01, 0.01]; KL=[0.1, 0.1, 0.08, 0.04, 0.01, 0, 0]; XF=[1, 1, 1, 1, 1, 0, 0]
          SoilCrop ryegrass: LL=[0.15, 0.14, 0.06, 0.02, 0.01, 0.01, 0.01]; KL=[0.1, 0.1, 0.08, 0.04, 0.01, 0, 0]; XF=[1, 1, 1, 1, 1, 0, 0]
          SoilCrop clover: LL=[0.15, 0.14, 0.06, 0.02, 0.01, 0.01, 0.01]; KL=[0.1, 0.1, 0.08, 0.04, 0.01, 0, 0]; XF=[1, 1, 1, 1, 1, 0, 0]
          SoilCrop slurp: LL=[0.14, 0.14, 0.03, 0.02, 0.02, 0.02, 0.02]; KL=[0.06, 0.06, 0.06, 0.06, 0.06, 0.06, 0.06]; XF=[1, 1, 1, 1, 1, 1, 1]
        SoilWater: SummerCona=3.5; SummerU=6; SummerDate=1-Nov; WinterCona=2; WinterU=2; WinterDate=1-apr; DiffusConst=88; DiffusSlope=35; Salb=0.13; CN2Bare=73; CNRed=20; CNCov=0.8; Thickness=[150, 150, 200, 150, 250, 300, 300]; SWCON=[0.5, 0.52, 0.55, 0.6, 0.65, 0.65, 0.65]
        SoilOrganicMatter: RootCN=40; RootWt=1000; SoilCN=12; EnrACoeff=7.4; EnrBCoeff=0.2; OCUnits=Total
          Thickness  OC    FBiom  FInert
          150        3     0.04   0.5
          150        1     0.02   0.7
          200        0.6   0.02   0.83
          150        0.4   0.01   0.9
          250        0.25  0.01   0.95
          300        0.15  0      0.99
          300        0.1   0      0.99
        InitialWater Initial water: FractionFull=0.95; PercentMethod=EvenlyDistributed; RelativeTo=ll15
        Sample Initial nitrogen: NO3Units=ppm; NH4Units=ppm; SWUnits=Volumetric; OCUnits=Total; PHUnits=Water
          Thickness  NO3  NH4
          150        5    0.1
          150        2.5  0.1
          200        1    0.1
          150        0.8  0.1
          250        0.5  0.1
          300        0.5  0.1
          300        0.5  0.1
      AgPasture Ryegrass
        # Initial values for each species to be simulated
        speciesToSimulate = Ryegrass  # Name of the species to be simulated
        iniShootDM = 2000  # Initial above ground dry matter weight (kgDM/ha)
        iniRootDM = 500  # Initial root dry matter weight (kgDM/ha)
        iniRootDepth = 750  # Initial rooting depth (mm)
        WaterUptakeSource = calc  # Water uptake done by AgPasture (calc) or by apsim?
        NUptakeSource = calc  # N uptake done by AgPasture (calc) or by apsim?
        # Detailed parameters for each species (overwrites the xml file)
        speciesName = ryegrass  # Name of each parameterised species
        micrometType = grass  # Plant type for MicroMet/SWIM
        photoPath = 3  # Photosynthesis pathway (C3=3, C4=4)
        isLegume = 0  # Is this a legume species? (no=0, yes=1)
        Pm = 1.0  # Reference photosynthesis rate - CO2 assimilation (mg CO2/m2.s)
        growthEfficiency = 0.75  # Growth efficiency factor - photosynthesis minus growth respiration (0-1)
        maintRespiration = 3.0  # Maintenance respiration coefficient (%)
        alphaPhoto = 0.01  # Leaf gross photosynthesis rate (mg CO2/J)
        thetaPhoto = 0.8  # Photosynthesis curve parameter (J/kg.s)
        fractionPAR = 0.5  # Fraction of radiation that is photosynthetic active (0-1)
        lightExtCoeff = 0.5  # Canopy light extinction coefficient (0-1)
        growthTmin = 2.0  # Minimum temperature for growth (oC)
        growthTopt = 20.0  # Optimum temperature for growth (oC)
        growthTq = 1.75  # Curve parameter for growth response to temperature
        useHeatStress = yes  # Consider effects of high temperatures on photosynthesis? (yes/no)
        heatOnsetT = 28.0  # Onset temperature for heat effects on growth (oC)
        heatFullT = 35.0  # Temperature for full heat effects on growth (oC)
        heatSumT = 30.0  # Temperature sum for recovery from heat effects (oC)
        heatTq = 1.0  # Exponent for computing recovery from heat stress
        heatRecoverT = 25.0  # Base temperature for recovery from heat stress (oC)
        useColdStress = yes  # Consider effects of low temperatures on photosynthesis? (yes/no)
        coldOnsetT = 0.0  # Onset temperature for cold effects on growth (oC)
        coldFullT = -3.0  # Temperature for full cold effects on growth (oC)
        coldSumT = 20.0  # Temperature sum for recovery from cold effects (oC)
        coldTq = 1.0  # Exponent for computing recovery from cold stress
        coldRecoverT = 0.0  # Base temperature for recovery from cold effects (oC)
        referenceCO2 = 380  # Reference atmospheric CO2 content for photosynthesis (ppm)
        respTref = 28.0  # Reference temperature for maintenance respiration (oC)
        maxTeffectResp = 1.25  # Maximum effect of temperature on respiration (>1.0)
        CO2PmaxScale = 700  # Scale factor for CO2 effect on photosynthesis (ppm)
        CO2NScale = 600  # Scale factor for CO2 effects on plant N concentration (ppm)
        CO2NMin = 0.7  # Minimum reduction of plant N concentration under elevated CO2 (0-1)
        CO2NCurvature = 2.0  # Curvature factor of CO2 effect on plant N concentration (>1.0)
        maxRootFraction = 0.25  # Maximum biomass fraction allocated to roots (0-1)
        targetSRratio = 4.0  # Target or ideal shoot:root ratio
        allocationSeasonF = 0.25  # Factor for increasing DM allocation to shoot during reproductive growth (0-1)
        StartHighAllocation = 232  # Day for starting the period with higher DM allocation to shoot
        DurationHighAllocation = 60  # Duration of main phase for higher DM allocation to shoot (days)
        ShoulderHighAllocation = 0.5  # Relative duration of shoulder periods for higher shoot allocation (0-1)
        useLatitudeFunction = no  # Adjust DM allocation (shoot/root) using latitude? (yes/no)
        ReferenceLatitude = 60.0  # Reference latitude, beyond which DM allocation is hardly affected (degrees)
        paramALatFunction = 5.0  # Exponent of function for defining the start of period with high allocation to shoot (>1.0)
        onsetFacLatFunction = 0.5  # Define the duration of onset phase with high allocation, fraction of main phase (0-1)
        outsetFacLatFunction = 0.5  # Define the duration of outset phase with high allocation, fraction of main phase (0-1)
        maxShoulderLatFunction = 60  # Maximum duration of the shoulder phases with high DM allocation (days)
        minPlateauLatFunction = 15  # Minimum duration of main phase (plateau) with high DM allocation (days)
        paramBLatFunction = 2.75  # Exponent of function defining the duration of main phase with high allocation (>0.0)
        paramCLatFunction = 4.0  # Exponent of function for DM fraction allocated to shoot (>1.0)
        allocationMax = 0.4  # Maximum increase in DM allocation to shoot during reproductive growth (0-1)
        maxFLeaf = 0.70  # Maximum fraction of new shoot growth allocated to leaves (0-1)
        minFLeaf = 0.70  # Minimum fraction of new shoot growth allocated to leaves (0-1)
        dmMaxFLeaf = 500  # Shoot DM for maximum leaf allocation, allocation decreases above that (kgDM/m2)
        dmReferenceFLeaf = 2000  # Reference DM, when allocation to leaves is midway max and min (kgDM/m2)
        exponentFLeaf = 3.0  # Exponent of function describing DM allocation to leaves (>0.0)
        fStolon = 0.0  # Fraction of new shoot growth allocated to stolons (0-1)
        liveLeavesPerTiller = 3.0  # Number of live leaves per tiller
        SpecificLeafArea = 20  # Specific leaf area, per dry matter weight (m2/kgDM)
        SpecificRootLength = 75  # Specific root length, per dry matter weight (m/gDM)
        rateLive2Dead = 0.05  # Reference tissue turnover rate for shoot (0-1)
        facGrowingTissue = 2.0  # Factor for adjusting DM turnover of growing tissue (0-1)
        refTurnoverRateStolon = 0.0  # Reference tissue turnover rate for stolon (0-1)
        rateDead2Litter = 0.11  # Reference littering rate - dead tissue to litter (0-1)
        rateRootSen = 0.02  # Reference senescence rate for roots (0-1)
        massFluxTmin = 2.0  # Minimum temperature for tissue turnover (oC)
        massFluxTopt = 20.0  # Optimum temperature for tissue turnover (oC)
        massFluxTq = 1.0  # Exponent of function for temperature effect on tissue turnover
        massFluxW0 = 2.0  # Scale factor for GLFWater effect on DM turnover (>1.0)
        massFluxWopt = 0.5  # Reference GLFwater for tissue turnover (0-1)
        massFluxDeadWq = 3.0  # Exponent to adjust GLFWater for senescing tissue (>1.0)
        stockParameter = 0.05  # Parameter for stock influence on tissue senescence
        Kappa2_Remob = 0.0  # Coefficient for remobilisation of luxury N from tissue2 (0-1)
        Kappa3_Remob = 0.0  # Coefficient for remobilisation of luxury N from tissue3 (0-1)
        Kappa4_Remob = 0.0  # Coefficient for partitioning non-used Nremob into tissue4 (0-1)
        digestLive = 0.6  # Digestibility of live plant material (0-1)
        digestDead = 0.2  # Digestibility of dead plant material (0-1)
        dmshoot = 1500  # Default initial shoot dry matter weight (kgDM/ha)
        dmroot = 450  # Default initial root dry matter weight (kgDM/ha)
        dmgreenmin = 300  # Minimum allowable green dry matter weight (kgDM/ha)
        dmdeadmin = 0  # Minimum allowable dead dry matter weight (kgDM/ha)
        NconcOptimum_leaves = 4.0  # Optimum N concentration of young leaves (%)
        NconcMaximum_leaves = 5.0  # Maximum N concentration in leaves, with luxury uptake (%)
        NconcMinimum_leaves = 1.2  # Minimum N concentration in leaves, at senescence (%)
        RelativeNconc_Stems = 0.5  # Relative N concentration in stems, fraction of leaf N (0-1)
        RelativeNconc_Stolons = 0.0  # Relative N concentration in stolons, fraction of leaf N (0-1)
        RelativeNconc_Roots = 0.5  # Relative N concentration in roots, fraction of leaf N (0-1)
        RelativeNconc_stage2 = 1.0  # Optimum N concentration for tissue2 (mature), relative to tissue1 (0-1)
        RelativeNconc_stage3 = 1.0  # Optimum N concentration for tissue3 (senescing), relative to tissue1 (0-1)
        NMinFix = 0.0  # Minimum N fixation, when soil N is sufficient (0-1)
        NMaxFix = 0.0  # Maximum N fixation, when no soil N is available (0-1)
        NdilutCoeff = 0.5  # Coefficient for modifying the effect of N stress on plant growth (0-1)
        waterStressFactor = 1.0  # coefficient for modifying the effect of water stress on plant growth (0-1)
        soilSatFactor = 0.1  # Coefficient for growth limitations due to soil moisture saturation (0-1)
        MinMacroPorosity = -1  # Minimum soil macroporosity (pores>30um) for optimum plant growth (0-1)
        GenericGLF = 1.0  # Generic relative growth limiting factor (0-1)
        SFertilityGLF = 1.0  # Soil related generic growth limiting factor (0-1)
        PreferenceForGreenDM = 1  # Weight factor defining the preference level for green DM (on removal)
        PreferenceForDeadDM = 1  # Weight factor defining the preference level for dead DM (on removal)
        PreferenceForLeaves = 1  # Weight factor defining the preference level for leaves over stems (on removal)
        rootDepth = 750  # Default rooting depth (mm)
        ExpoLinearDepthParam = 90  # Depth from surface below which the proportion of roots starts to decrease (mm)
        ExpoLinearCurveParam = 3.2  # Exponent to determine the distribution of root DM in the soil profile
        MaxPlantHeight = 500  # Maximum average height for each species in a sward (mm)
        MassForMaxHeight = 8000  # Mass above ground when maximum height is reached (kgDM/ha)
        ExponentHeightFromMass = 3.00  # Exponent of function describing plant height as function of DM weight (>1.0)
        MinimumHeight = 20  # Minimum plant height, for all species (mm)
        # Generic parameters for initialising the sward, by species type
        initialDMFractions_grass = 0.15  0.25  0.25  0.05  0.05  0.10  0.10  0.05  0.00  0.00  0.00  # Fractions of initial dmshoot for each biomass pool, for grasses
      outputfile Results_Species: filename=OneSpecies AgPastureClassic Results_Species.out; title=OneSpecies AgPastureClassic Results_Species
        variables
          variable:
            dd/mmm/yyyy as Date
            Crop_name as Sward.Name
            Species_name(1) as Ryegrass.Name
            Crop_type as Ryegrass.CropType
            SpeciesTotalWt(1) as Ryegrass.TotalWt
            SpeciesAboveGroundWt(1) as Ryegrass.AboveGroundWt
            SpeciesBelowGroundWt(1) as Ryegrass.BelowGroundWt
            SpeciesStandingWt(1) as Ryegrass.StandingWt
            SpeciesStandingLiveWt(1) as Ryegrass.StandingLiveWt
            SpeciesStandingDeadWt(1) as Ryegrass.StandingDeadWt
            SpeciesLeafWt(1) as Ryegrass.LeafWt
            SpeciesStemWt(1) as Ryegrass.StemWt
            SpeciesStolonWt(1) as Ryegrass.StolonWt
            SpeciesRootWt(1) as Ryegrass.RootWt
            SpeciesLeafStage1Wt(1) as Ryegrass.LeafStage1Wt
            SpeciesLeafStage2Wt(1) as Ryegrass.LeafStage2Wt
            SpeciesLeafStage3Wt(1) as Ryegrass.LeafStage3Wt
            SpeciesLeafStage4Wt(1) as Ryegrass.LeafStage4Wt
            SpeciesStemStage1Wt(1) as Ryegrass.StemStage1Wt
            SpeciesStemStage2Wt(1) as Ryegrass.StemStage2Wt
            SpeciesStemStage3Wt(1) as Ryegrass.StemStage3Wt
            SpeciesStemStage4Wt(1) as Ryegrass.StemStage4Wt
            SpeciesStolonStage1Wt(1) as Ryegrass.StolonStage1Wt
            SpeciesStolonStage2Wt(1) as Ryegrass.StolonStage2Wt
            SpeciesStolonStage3Wt(1) as Ryegrass.StolonStage3Wt
            SpeciesPotCarbonAssimilation(1) as Ryegrass.PotCarbonAssimilation
            SpeciesCarbonLossRespiration(1) as Ryegrass.CarbonLossRespiration
            SpeciesPotGrowthGross(1) as Ryegrass.GrossPotentialGrowthWt
            SpeciesPotGrowthNet(1) as Ryegrass.NetPotentialGrowthWt
            SpeciesPotGrowthNoNLimit(1) as Ryegrass.PotGrowthWt_Wstress
            SpeciesGrowthWt(1) as Ryegrass.ActualGrowthWt
            SpeciesNetGrowthWt(1) as Ryegrass.EffectiveGrowthWt
            SpeciesHerbageGrowth(1) as Ryegrass.HerbageGrowthWt
            speciesFShoot(1) as Ryegrass.ShootDMAllocation
            SpeciesLitterWt(1) as Ryegrass.LitterWt
            SpeciesRootSenescedWt(1) as Ryegrass.RootSenescedWt
            SpeciesTotalN(1) as Ryegrass.TotalN
            SpeciesStandingN(1) as Ryegrass.StandingN
            SpeciesLeafN(1) as Ryegrass.LeafN
            SpeciesStemN(1) as Ryegrass.StemN
            SpeciesStolonN(1) as Ryegrass.StolonN
            SpeciesRootN(1) as Ryegrass.RootN
            SpeciesLeafStage1N(1) as Ryegrass.LeafStage1N
            SpeciesLeafStage2N(1) as Ryegrass.LeafStage2N
            SpeciesLeafStage3N(1) as Ryegrass.LeafStage3N
            SpeciesLeafStage4N(1) as Ryegrass.LeafStage4N
            SpeciesStemStage1N(1) as Ryegrass.StemStage1N
            SpeciesStemStage2N(1) as Ryegrass.StemStage2N
            SpeciesStemStage3N(1) as Ryegrass.StemStage3N
            SpeciesStemStage4N(1) as Ryegrass.StemStage4N
            SpeciesStolonStage1N(1) as Ryegrass.StolonStage1N
            SpeciesStolonStage2N(1) as Ryegrass.StolonStage2N
            SpeciesStolonStage3N(1) as Ryegrass.StolonStage3N
            SpeciesLeafNConc(1) as Ryegrass.LeafNConc
            SpeciesStemNConc(1) as Ryegrass.StemNConc
            SpeciesStolonNConc(1) as Ryegrass.StolonNConc
            SpeciesRootNConc(1) as Ryegrass.RootNConc
            SpeciesLeafStage1NConc(1) as Ryegrass.LeafStage1NConc
            SpeciesLeafStage2NConc(1) as Ryegrass.LeafStage2NConc
            SpeciesLeafStage3NConc(1) as Ryegrass.LeafStage3NConc
            SpeciesLeafStage4NConc(1) as Ryegrass.LeafStage4NConc
            SpeciesStemStage1NConc(1) as Ryegrass.StemStage1NConc
            SpeciesStemStage2NConc(1) as Ryegrass.StemStage2NConc
            SpeciesStemStage3NConc(1) as Ryegrass.StemStage3NConc
            SpeciesStemStage4NConc(1) as Ryegrass.StemStage4NConc
            SpeciesStolonStage1NConc(1) as Ryegrass.StolonStage1NConc
            SpeciesStolonStage2NConc(1) as Ryegrass.StolonStage2NConc
            SpeciesStolonStage3NConc(1) as Ryegrass.StolonStage3NConc
            SpeciesSenescedNRemobilisable(1) as Ryegrass.RemobilisableSenescedN
            SpeciesSenescedNRemobilised(1) as Ryegrass.RemobilisedSenescedN
            SpeciesRemobilisableNLuxury(1) as Ryegrass.RemobilisableLuxuryN
            SpeciesLuxuryNRemobilised(1) as Ryegrass.RemobilisedLuxuryN
            SpeciesFixedN(1) as Ryegrass.FixedN
            SpeciesRequiredNLuxury(1) as Ryegrass.RequiredLuxuryN
            SpeciesRequiredNOptimum(1) as Ryegrass.RequiredOptimumN
            SpeciesDemandN(1) as Ryegrass.DemandSoilN
            SpeciesUptakeN(1) as Ryegrass.UptakeN
            SpeciesLitterN(1) as Ryegrass.LitterN
            SpeciesRootSenescedN(1) as Ryegrass.SenescedRootN
            SpeciesGrowthN(1) as Ryegrass.ActualGrowthN
            SpeciesGrowthNconc(1) as Ryegrass.ActualGrowthNConc
            SpeciesWaterDemand(1) as Ryegrass.WaterDemand
            SpeciesWaterUptake(1) as Ryegrass.WaterUptake
            SpeciesLiveDMTurnoverRate(1) as Ryegrass.LiveDMTurnoverRate
            SpeciesDeadDMTurnoverRate(1) as Ryegrass.DeadDMTurnoverRate
            SpeciesStolonDMTurnoverRate(1) as Ryegrass.StolonDMTurnoverRate
            SpeciesRootDMTurnoverRate(1) as Ryegrass.RootDMTurnoverRate
            SpeciesTotalLAI(1) as Ryegrass.TotalLAI
            SpeciesGreenLAI(1) as Ryegrass.GreenLAI
            SpeciesDeadLAI(1) as Ryegrass.DeadLAI
            SpeciesRadnFactor(1) as Ryegrass.GlfRadnIntercept
            SpeciesCO2Factor(1) as Ryegrass.GlfCO2
            SpeciesNconcFactor(1) as Ryegrass.GlfNConcentration
            SpeciesGLFT(1) as Ryegrass.GlfTemperature
            SpeciesGLFA(1)  as Ryegrass.GlfWaterLogging
            SpeciesGLFW(1) as Ryegrass.GlfWater
            SpeciesGLFN(1) as Ryegrass.GlfN
            SpeciesIrradianceTopCanopy(1) as Ryegrass.IrradianceTopCanopy
            SpeciesHarvestableWt(1) as Ryegrass.HarvestableWt
            SpeciesHarvestWt(1) as Ryegrass.HarvestedWt
            SpeciesHarvestPct(1) as Ryegrass.HarvestedFraction
            SpeciesHarvestN(1) as Ryegrass.HarvestedN
            SpeciesHerbageDigestibility(1) as Ryegrass.HerbageDigestibility
            SpeciesDefoliatedDigestibility(1) as Ryegrass.HarvestedDigestibility
            SpeciesTempFactor
        events Reporting Frequency: event=end_day
      outputfile Results_Layers: filename=OneSpecies AgPastureClassic Results_Layers.out; title=OneSpecies AgPastureClassic Results_Layers
        variables
          variable:
            dd/mmm/yyyy as Date
            Crop_name as Sward.Name
            dlayer as Soil.Thickness
            RootWtFraction as Ryegrass.RootWtFraction
            rlv as Ryegrass.RLD
            NitrogenSupplyLayers as Ryegrass.NitrogenAvailable
            NitrogenUptakeLayers as Ryegrass.NitrogenUptake
            WaterSupplyLayers as Ryegrass.SoilAvailableWater
            WaterUptakeLayers as Ryegrass.WaterUptake
        events Reporting Frequency: event=end_day
      outputfile Results_MassBalance: filename=OneSpecies AgPastureClassic Results_MassBalance.out; title=OneSpecies AgPastureClassic Results_MassBalance
        variables
          variable:
            dd/mmm/yyyy as Date
            Crop_name as Sward.Name
            TotalPlantN as TotalPlantN
            urea() as TotalUrea
            nh4() as TotalNH4
            no3() as TotalNO3
            hum_n() as TotalHumusN
            biom_n() as TotalBiomN
            fom_N() as TotalFomN
            surfaceom_n as SurfaceOMN
            fertiliser as FertiliserN
            PlantFixedN as FixedN
            HarvestN as HarvestN
            dnit() as DenitrifiedN
            leach_no3 as LeachedN
            NitrogenUptake as UptakeN
            PlantRemobilisedN as NitrogenRemobilisedSenescence
            PlantLuxuryNRemobilised as NitrogenRemobilisedLuxury
            PlantGrowthN as ActualGrowthN
            LitterDepositionN as LitterDepositionN
            RootSenescenceN as RootSenescenceN
            sw_dep() as TotalSoilWater
            rain as Rain
            irrigation as Irrigation
            runoff as Runoff
            drain as Drainage
            es as Evaporation
            WaterUptake as WaterUptake
            StandingPlantWt as Pasture.StandingWt
            PreHarvestDM as PreHarvestDM
            PostHarvestDM as PostHarvestDM
            harvested_dm as DefoliatedWt
            harvested_dm as HarvestedWt
            removed_dm as RemovedWt
            returned_dm as ReturnedWt
            harvested_n as DefoliatedN
            harvested_n as HarvestedN
            removed_n as RemovedN
            NReturnedInDung as NReturnedInDung
            NReturnedInUrine as NReturnedInUrine
            DaysAfterCut as DaysAfterCut
            HerbageDigestibility
            DefoliatedDigestibility
            SwardDefoliatedDigestibility
            SpeciesDeadDigestibility
        events Reporting Frequency: event=end_day
  simulation TwoSpecies
    clock
      start_date = 01/07/2000  # Enter the start date of the simulation
      end_date = 30/06/2003  # Enter the end date of the simulation
    metfile met: filename=%apsim%X\Tests\WeatherFiles\Ruakura.met
    summaryfile
    area AgPastureClassic
      folder Managers
        manager2 HarvestingAgPasture: same as OneSpecies.AgPastureClassic.Managers.HarvestingAgPasture
        manager2 FertOnSoilNCriteria
          # Fertiliser application based on Soil N amount
          FertAllowed = yes  # Turn ferliser applications on?
          FertDepth2SoilN = 500  # Depth to calculate available soil N (mm)
          FertCriticalSoilN = 10  # Minimum available N, triggers an application (kgN/ha)
          FertNAmount = 25  # Amount of N fertiliser for each application (kgN/ha)
          FertType = urea_n  # Type of N fertiliser to apply
          FertApplicationDepth = 1  # Depth at which to apply the fertiliser (mm)
          FertMinimumDays = 30  # Minimum period between applications (days)
          script: same as in OneSpecies.AgPastureClassic.Managers.FertOnSoilNCriteria
        manager2 CentrePivotIrrigation: same as OneSpecies.AgPastureClassic.Managers.CentrePivotIrrigation
      micromet
        soilalbedo = 0.23
        a_interception = 0
        b_interception = 0
        c_interception = 0
        d_interception = 0
      irrigation: same as OneSpecies.AgPastureClassic.Irrigation
      fertiliser
      surfaceom SurfaceOrganicMatter
        PoolName = AgPasture  # Organic Matter pool name
        type = grass  # Organic Matter type
        mass = 1000  # Initial surface residue (kg/ha)
        cnr = 40  # C:N ratio of initial residue
        standing_fraction = 0  # Fraction of residue standing
      Soil SoilLismore: same as OneSpecies.AgPastureClassic.SoilLismore
      AgPasture
        # Initial values for each species to be simulated
        speciesToSimulate = Ryegrass    WhiteClover  # Name of the species to be simulated
        iniShootDM = 1500   500  # Initial above ground dry matter weight (kgDM/ha)
        iniRootDM = 400     100  # Initial root dry matter weight (kgDM/ha)
        iniRootDepth = 750     350  # Initial rooting depth (mm)
        WaterUptakeSource = calc  # Water uptake done by AgPasture (calc) or by apsim?
        NUptakeSource = calc  # N uptake done by AgPasture (calc) or by apsim?
        # Detailed parameters for each species (overwrites the xml file)
        speciesName = ryegrass   whiteclover  # Name of each parameterised species
        micrometType = grass   grass  # Plant type for MicroMet/SWIM
        photoPath = 3   3  # Photosynthesis pathway (C3=3, C4=4)
        isLegume = 0   1  # Is this a legume species? (no=0, yes=1)
        Pm = 1   1  # Reference photosynthesis rate - CO2 assimilation (mg CO2/m2.s)
        growthEfficiency = 0.75   0.75  # Growth efficiency factor - photosynthesis minus growth respiration (0-1)
        maintRespiration = 3   3  # Maintenance respiration coefficient (%)
        alphaPhoto = 0.01   0.01  # Leaf gross photosynthesis rate (mg CO2/J)
        thetaPhoto = 0.8   0.8  # Photosynthesis curve parameter (J/kg.s)
        fractionPAR = 0.5   0.5  # Fraction of radiation that is photosynthetic active (0-1)
        lightExtCoeff = 0.5   0.8  # Canopy light extinction coefficient (0-1)
        growthTmin = 2   4  # Minimum temperature for growth (oC)
        growthTopt = 20   20  # Optimum temperature for growth (oC)
        growthTq = 1.75   1.75  # Curve parameter for growth response to temperature
        useHeatStress = yes   yes  # Consider effects of high temperatures on photosynthesis? (yes/no)
        heatOnsetT = 28   28  # Onset temperature for heat effects on growth (oC)
        heatFullT = 35   35  # Temperature for full heat effects on growth (oC)
        heatSumT = 30   30  # Temperature sum for recovery from heat effects (oC)
        heatTq = 1   0.8  # Exponent for computing recovery from heat stress
        heatRecoverT = 25   27  # Base temperature for recovery from heat stress (oC)
        useColdStress = yes   yes  # Consider effects of low temperatures on photosynthesis? (yes/no)
        coldOnsetT = 0   0  # Onset temperature for cold effects on growth (oC)
        coldFullT = -3   -3  # Temperature for full cold effects on growth (oC)
        coldSumT = 20   20  # Temperature sum for recovery from cold effects (oC)
        coldTq = 1   1  # Exponent for computing recovery from cold stress
        coldRecoverT = 0   1  # Base temperature for recovery from cold effects (oC)
        respTref = 380   20  # Reference temperature for maintenance respiration (oC)
        maxTeffectResp = 28   1.25  # Maximum effect of temperature on respiration (>1.0)
        referenceCO2 = 1.25   380  # Reference atmospheric CO2 content for photosynthesis (ppm)
        CO2PmaxScale = 700   700  # Scale factor for CO2 effect on photosynthesis (ppm)
        CO2NScale = 600   600  # Scale factor for CO2 effects on plant N concentration (ppm)
        CO2NMin = 0.7   0.7  # Minimum reduction of plant N concentration under elevated CO2 (0-1)
        CO2NCurvature = 2   2  # Curvature factor of CO2 effect on plant N concentration (>1.0)
        maxRootFraction = 0.25   0.25  # Maximum biomass fraction allocated to roots (0-1)
        targetSRratio = 4   4  # Target or ideal shoot:root ratio
        allocationSeasonF = 0.25   0.25  # Factor for increasing DM allocation to shoot during reproductive growth (0-1)
        StartHighAllocation = 232   232  # Day for starting the period with higher DM allocation to shoot
        DurationHighAllocation = 60   60  # Duration of main phase for higher DM allocation to shoot (days)
        ShoulderHighAllocation = 0.5   0.5  # Relative duration of shoulder periods for higher shoot allocation (0-1)
        useLatitudeFunction = no   no  # Adjust DM allocation (shoot/root) using latitude? (yes/no)
        ReferenceLatitude = 60   60  # Reference latitude, beyond which DM allocation is hardly affected (degrees)
        paramALatFunction = 5   5  # Exponent of function for defining the start of period with high allocation to shoot (>1.0)
        onsetFacLatFunction = 0.5   0.5  # Define the duration of onset phase with high allocation, fraction of main phase (0-1)
        outsetFacLatFunction = 0.5   0.5  # Define the duration of outset phase with high allocation, fraction of main phase (0-1)
        maxShoulderLatFunction = 60   60  # Maximum duration of the shoulder phases with high DM allocation (days)
        minPlateauLatFunction = 15   15  # Minimum duration of main phase (plateau) with high DM allocation (days)
        paramBLatFunction = 2.75   2.75  # Exponent of function defining the duration of main phase with high allocation (>0.0)
        paramCLatFunction = 4   4  # Exponent of function for DM fraction allocated to shoot (>1.0)
        allocationMax = 0.4   0.4  # Maximum increase in DM allocation to shoot during reproductive growth (0-1)
        maxFLeaf = 0.7   0.56  # Maximum fraction of new shoot growth allocated to leaves (0-1)
        minFLeaf = 0.7   0.28  # Minimum fraction of new shoot growth allocated to leaves (0-1)
        dmMaxFLeaf = 500   500  # Shoot DM for maximum leaf allocation, allocation decreases above that (kgDM/m2)
        dmReferenceFLeaf = 2000   2000  # Reference DM, when allocation to leaves is midway max and min (kgDM/m2)
        exponentFLeaf = 3   3  # Exponent of function describing DM allocation to leaves (>0.0)
        fStolon = 0   0.2  # Fraction of new shoot growth allocated to stolons (0-1)
        liveLeavesPerTiller = 3   3  # Number of live leaves per tiller
        SpecificLeafArea = 20   20  # Specific leaf area, per dry matter weight (m2/kgDM)
        SpecificRootLength = 75   75  # Specific root length, per dry matter weight (m/gDM)
        rateLive2Dead = 0.05   0.025  # Reference tissue turnover rate for shoot (0-1)
        facGrowingTissue = 2   2  # Factor for adjusting DM turnover of growing tissue (0-1)
        refTurnoverRateStolon = 0   0.05  # Reference tissue turnover rate for stolon (0-1)
        rateDead2Litter = 0.11   0.11  # Reference littering rate - dead tissue to litter (0-1)
        rateRootSen = 0.02   0.02  # Reference senescence rate for roots (0-1)
        massFluxTmin = 2   3  # Minimum temperature for tissue turnover (oC)
        massFluxTopt = 20   20  # Optimum temperature for tissue turnover (oC)
        massFluxTq = 1   1  # Exponent of function for temperature effect on tissue turnover
        massFluxW0 = 2   2  # Scale factor for GLFWater effect on DM turnover (>1.0)
        massFluxWopt = 0.5   0.5  # Reference GLFwater for tissue turnover (0-1)
        massFluxDeadWq = 3   3  # Exponent to adjust GLFWater for senescing tissue (>1.0)
        stockParameter = 0.05   0.05  # Parameter for stock influence on tissue senescence
        Kappa2_Remob = 0   0  # Coefficient for remobilisation of luxury N from tissue2 (0-1)
        Kappa3_Remob = 0   0  # Coefficient for remobilisation of luxury N from tissue3 (0-1)
        Kappa4_Remob = 0   0  # Coefficient for partitioning non-used Nremob into tissue4 (0-1)
        digestLive = 0.6   0.6  # Digestibility of live plant material (0-1)
        digestDead = 0.2   0.2  # Digestibility of dead plant material (0-1)
        dmshoot = 1500   500  # Default initial shoot dry matter weight (kgDM/ha)
        dmroot = 450   150  # Default initial root dry matter weight (kgDM/ha)
        dmgreenmin = 300   100  # Minimum allowable green dry matter weight (kgDM/ha)
        dmdeadmin = 0   0  # Minimum allowable dead dry matter weight (kgDM/ha)
        NconcOptimum_leaves = 4   4.5  # Optimum N concentration of young leaves (%)
        NconcMaximum_leaves = 5   5.5  # Maximum N concentration in leaves, with luxury uptake (%)
        NconcMinimum_leaves = 1.2   2  # Minimum N concentration in leaves, at senescence (%)
        RelativeNconc_Stems = 0.5   0.5  # Relative N concentration in stems, fraction of leaf N (0-1)
        RelativeNconc_Stolons = 0   0.5  # Relative N concentration in stolons, fraction of leaf N (0-1)
        RelativeNconc_Roots = 0.5   0.5  # Relative N concentration in roots, fraction of leaf N (0-1)
        RelativeNconc_stage2 = 1   1  # Optimum N concentration for tissue2 (mature), relative to tissue1 (0-1)
        RelativeNconc_stage3 = 1   1  # Optimum N concentration for tissue3 (senescing), relative to tissue1 (0-1)
        NMinFix = 0   0.2  # Minimum N fixation, when soil N is sufficient (0-1)
        NMaxFix = 0   0.6  # Maximum N fixation, when no soil N is available (0-1)
        NdilutCoeff = 0.5   1  # Coefficient for modifying the effect of N stress on plant growth (0-1)
        waterStressFactor = 1   1  # coefficient for modifying the effect of water stress on plant growth (0-1)
        soilSatFactor = 0.1   0.1  # Coefficient for growth limitations due to soil moisture saturation (0-1)
        MinMacroPorosity = -1   -1  # Minimum soil macroporosity (pores>30um) for optimum plant growth (0-1)
        GenericGLF = 1   1  # Generic relative growth limiting factor (0-1)
        SFertilityGLF = 1   1  # Soil related generic growth limiting factor (0-1)
        PreferenceForGreenDM = 1   1  # Weight factor defining the preference level for green DM (on removal)
        PreferenceForDeadDM = 1   1  # Weight factor defining the preference level for dead DM (on removal)
        PreferenceForLeaves = 1   1  # Weight factor defining the preference level for leaves over stems (on removal)
        rootDepth = 750   350  # Default rooting depth (mm)
        ExpoLinearDepthParam = 90   70  # Depth from surface below which the proportion of roots starts to decrease (mm)
        ExpoLinearCurveParam = 3.2   2.5  # Exponent to determine the distribution of root DM in the soil profile
        MaxPlantHeight = 500   300  # Maximum average height for each species in a sward (mm)
        MassForMaxHeight = 8000   6000  # Mass above ground when maximum height is reached (kgDM/ha)
        ExponentHeightFromMass = 3   1.75  # Exponent of function describing plant height as function of DM weight (>1.0)
        MinimumHeight = 20  # Minimum plant height, for all species (mm)
        # Generic parameters for initialising the sward, by species type
        initialDMFractions_grass = 0.15  0.25  0.25  0.05  0.05  0.10  0.10  0.05  0.00  0.00  0.00  # Fractions of initial dmshoot for each biomass pool, for grasses
        initialDMFractions_legume = 0.16  0.23  0.22  0.05  0.03  0.05  0.05  0.01  0.04  0.08  0.08  # Fractions of initial dmshoot for each biomass pool, for legumes
      outputfile Results_Sward: filename=TwoSpecies AgPastureClassic Results_Sward.out; title=TwoSpecies AgPastureClassic Results_Sward
        variables
          variable:
            dd/mmm/yyyy as Date
            Crop_name as Sward.Name
            Crop_type as Sward.CropType
            TotalPlantWt as Sward.TotalWt
            AboveGroundWt as Sward.AboveGroundWt
            BelowGroundWt as Sward.BelowGroundWt
            StandingPlantWt as Sward.StandingWt
            SpeciesStandingLiveWt() as Sward.StandingLiveWt
            SpeciesStandingDeadWt() as Sward.StandingDeadWt
            LeafWt as Sward.LeafWt
            StemWt as Sward.StemWt
            StolonWt as Sward.StolonWt
            RootWt as Sward.RootWt
            SpeciesLeafStage1Wt as Sward.LeafStage1Wt
            SpeciesLeafStage2Wt as Sward.LeafStage2Wt
            SpeciesLeafStage3Wt as Sward.LeafStage3Wt
            SpeciesLeafStage4Wt as Sward.LeafStage4Wt
            SpeciesStemStage1Wt as Sward.StemStage1Wt
            SpeciesStemStage2Wt as Sward.StemStage2Wt
            SpeciesStemStage3Wt as Sward.StemStage3Wt
            SpeciesStemStage4Wt as Sward.StemStage4Wt
            SpeciesStolonStage1Wt as Sward.StolonStage1Wt
            SpeciesStolonStage2Wt as Sward.StolonStage2Wt
            SpeciesStolonStage3Wt as Sward.StolonStage3Wt
            PlantPotentialCarbonAssimilation as Sward.PotCarbonAssimilation
            PlantCarbonLossRespiration as Sward.CarbonLossRespiration
            PlantPotentialGrossGrowth as Sward.GrossPotentialGrowthWt
            PlantPotentialGrowthWt as Sward.NetPotentialGrowthWt
            PlantGrowthNoNLimit as Sward.PotGrowthWt_Wstress
            PlantGrowthWt as Sward.ActualGrowthWt
            PlantNetGrowthWt as Sward.EffectiveGrowthWt
            HerbageGrowthWt as Sward.HerbageGrowthWt
            LitterDepositionWt as Sward.LitterWt
            RootSenescenceWt as Sward.RootSenescedWt
            TotalPlantN as Sward.TotalN
            StandingPlantN as Sward.StandingN
            LeafN as Sward.LeafN
            StemN as Sward.StemN
            StolonN as Sward.StolonN
            RootN as Sward.RootN
            SpeciesLeafStage1N as Sward.LeafStage1N
            SpeciesLeafStage2N as Sward.LeafStage2N
            SpeciesLeafStage3N as Sward.LeafStage3N
            SpeciesLeafStage4N as Sward.LeafStage4N
            SpeciesStemStage1N as Sward.StemStage1N
            SpeciesStemStage2N as Sward.StemStage2N
            SpeciesStemStage3N as Sward.StemStage3N
            SpeciesStemStage4N as Sward.StemStage4N
            SpeciesStolonStage1N as Sward.StolonStage1N
            SpeciesStolonStage2N as Sward.StolonStage2N
            SpeciesStolonStage3N as Sward.StolonStage3N
            LeafNConc as Sward.LeafNConc
            StemNConc as Sward.StemNConc
            StolonNConc as Sward.StolonNConc
            RootNConc as Sward.RootNConc
            SpeciesLeafStage1NConc as Sward.LeafStage1NConc
            SpeciesLeafStage2NConc as Sward.LeafStage2NConc
            SpeciesLeafStage3NConc as Sward.LeafStage3NConc
            SpeciesLeafStage4NConc as Sward.LeafStage4NConc
            SpeciesStemStage1NConc as Sward.StemStage1NConc
            SpeciesStemStage2NConc as Sward.StemStage2NConc
            SpeciesStemStage3NConc as Sward.StemStage3NConc
            SpeciesStemStage4NConc as Sward.StemStage4NConc
            SpeciesStolonStage1NConc as Sward.StolonStage1NConc
            SpeciesStolonStage2NConc as Sward.StolonStage2NConc
            SpeciesStolonStage3NConc as Sward.StolonStage3NConc
            PlantRemobilisableSenescedN as Sward.RemobilisableSenescedN
            PlantRemobilisedN as Sward.RemobilisedSenescedN
            PlantRemobilisableLuxuryN as Sward.RemobilisableLuxuryN
            PlantLuxuryNRemobilised as Sward.RemobilisedLuxuryN
            PlantFixedN as Sward.FixedN
            NitrogenRequiredLuxury as Sward.RequiredLuxuryN
            NitrogenRequiredOptimum as Sward.RequiredOptimumN
            NitrogenDemand as Sward.DemandSoilN
            NitrogenUptake as Sward.UptakeN
            LitterDepositionN as Sward.LitterN
            RootSenescenceN as Sward.SenescedRootN
            PlantGrowthN as Sward.ActualGrowthN
            PlantGrowthNconc as Sward.ActualGrowthNConc
            WaterDemand as Sward.WaterDemand
            WaterUptake as Sward.WaterUptake
            SpeciesLiveDMTurnoverRate() as Sward.LiveDMTurnoverRate
            SpeciesDeadDMTurnoverRate() as Sward.DeadDMTurnoverRate
            SpeciesStolonDMTurnoverRate() as Sward.StolonDMTurnoverRate
            SpeciesRootDMTurnoverRate() as Sward.RootDMTurnoverRate
            LAI_total as Sward.TotalLAI
            LAI_green as Sward.GreenLAI
            LAI_dead as Sward.DeadLAI
            GLFtemp as Sward.GlfTemperature
            GLFwater as Sward.GlfWater
            GLFn as Sward.GlfN
            InterceptedRadn as Sward.IrradianceTopCanopy
            HarvestableWt as Sward.HarvestableWt
            HarvestWt as Sward.HarvestedWt
            HarvestN as Sward.HarvestedN
            HerbageDigestibility as Sward.HerbageDigestibility
        events Reporting Frequency: event=end_day
      outputfile Results_Layers: filename=TwoSpecies AgPastureClassic Results_Layers.out; title=TwoSpecies AgPastureClassic Results_Layers
        variables
          variable:
            dd/mmm/yyyy as Date
            Crop_name as Sward.Name
            dlayer as Soil.Thickness
            RootWtFraction as Sward.RootWtFraction
            rlv as Sward.RLD
            NitrogenSupplyLayers as Sward.NitrogenAvailable
            NitrogenUptakeLayers as Sward.NitrogenUptake
            WaterSupplyLayers as Sward.SoilAvailableWater
            WaterUptakeLayers as Sward.WaterUptake
        events Reporting Frequency: event=end_day
      outputfile Results_MassBalance: filename=TwoSpecies AgPastureClassic Results_MassBalance.out; title=TwoSpecies AgPastureClassic Results_MassBalance
        variables
          variable:
            dd/mmm/yyyy as Date
            Crop_name as Sward.Name
            TotalPlantN as TotalPlantN
            urea() as TotalUrea
            nh4() as TotalNH4
            no3() as TotalNO3
            hum_n() as TotalHumusN
            biom_n() as TotalBiomN
            fom_N() as TotalFomN
            surfaceom_n as SurfaceOMN
            fertiliser as FertiliserN
            PlantFixedN as FixedN
            HarvestN as HarvestN
            dnit() as DenitrifiedN
            leach_no3 as LeachedN
            NitrogenUptake as UptakeN
            PlantRemobilisedN as NitrogenRemobilisedSenescence
            PlantLuxuryNRemobilised as NitrogenRemobilisedLuxury
            PlantGrowthN as ActualGrowthN
            LitterDepositionN as LitterDepositionN
            RootSenescenceN as RootSenescenceN
            sw_dep() as TotalSoilWater
            rain as Rain
            irrigation as Irrigation
            runoff as Runoff
            drain as Drainage
            es as Evaporation
            WaterUptake as WaterUptake
            StandingPlantWt as Pasture.StandingWt
            PreHarvestDM as PreHarvestDM
            PostHarvestDM as PostHarvestDM
            harvested_dm as DefoliatedWt
            harvested_dm as HarvestedWt
            removed_dm as RemovedWt
            returned_dm as ReturnedWt
            harvested_n as DefoliatedN
            harvested_n as HarvestedN
            removed_n as RemovedN
            NReturnedInDung as NReturnedInDung
            NReturnedInUrine as NReturnedInUrine
            DaysAfterCut as DaysAfterCut
        events Reporting Frequency: event=end_day
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