Simulations: Version=1
  Simulation Small Windbreak Example: Area=0; Slope=0
    Clock: StartDate=1900-01-01; EndDate=1900-12-31
    Summary SummaryFile
    Weather: FileName=DalbyWithWind.met
    SoilArbitrator Soil Arbitrator
    ForestrySystem WindbreakSystem: Area=0.25; Slope=0
      TreeProxy: NDemand=0; RootRadius=0; heights=[10000, 10000, 10000, 10000, 10000]
        Table=[[Parameter, 0, 0.5h, 1h, 1.5h, 2h, 2.5h, 3h, 4h, 5h, 6h], [Shade (%), Nitrogen Demand (kg/ha), Root Length Density (cm/cm3), Depth (cm), 0-15, 15-30, 30-60, 60-90, 90-120, 120-150, 150-180], [100, 0, , , .06, .05, .04, .02, .015, .01, 0], [0, 0, , , .06, .05, .04, .02, .015, .01, 0], [0, 0, , , .05, .04, .035, .02, .015, .01, 0], [0, 0, , , .04, .03, .03, .015, .01, .01, 0], [0, 0, , , .03, .02, .02, .01, 0, 0, 0], [0, 0, , , .02, .01, .01, 0, 0, 0, 0], [0, 0, , , .01, .005, .002, 0, 0, 0, 0], [0, 0, , , 0, 0, 0, 0, 0, 0, 0], [0, 0, , , 0, 0, 0, 0, 0, 0, 0], [0, 0, , , 0, 0, 0, 0, 0, 0, 0]]
        dates=[1900-01-01, 1900-03-01, 1900-06-01, 1900-09-01, 1900-12-31]
      Manager SowingRule
        StartDate = 1-may
        EndDate = 10-jul
        MinESW = 10
        ESWZoneName = 0 to 5m
        MinRain = 25
        RainDays = 7
        CultivarName = Hartog
        SowingDepth = 30
        RowSpacing = 250
        Population = 120
        Amount = 100
        CropName = wheat
```csharp
using System;
using System.Collections.Generic;
using Models.Core;
using Models.Agroforestry;
using Models.PMF.OldPlant;
using Models.Soils;
using Models.Utilities;
using Models.Zones;
using APSIM.Shared.Utilities;

namespace Models
{
	[Serializable]
	public class Script : Model
	{
		[Link] Clock Clock;
		[Link] Summary Summary;
		Accumulator accumulatedRain;
		
		[Description("Start of sowing window (d-mmm)")]
		public string StartDate { get; set; }
		[Description("End of sowing window (d-mmm)")]
		public string EndDate { get; set; }
		[Description("Minimum extractable soil water for sowing (mm)")]
		public double MinESW { get; set; }
		[Description("Name of Zone to use for minimum ESW condition")]
		public string ESWZoneName { get; set; }
		[Description("Accumulated rainfall required for sowing (mm)")]
		public double MinRain { get; set; }
		[Description("Duration of rainfall accumulation (d)")]
		public int RainDays { get; set; }
		[Description("Cultivar to be sown")]
		public string CultivarName { get; set; }
		[Description("Sowing depth (mm)")]
		public double SowingDepth { get; set; }
		[Description("Row spacing (mm)")]
		public double RowSpacing { get; set; }
		[Description("Plant population (/m2)")]
		public double Population { get; set; }
		[Description("Amount of fertiliser to be applied (kg/ha)")]
		public double Amount { get; set; }
		[Description("Crop to be fertilised")]
		public string CropName { get; set; }
		
		private Zone ESWZone;
		private List<IModel> Zones;
		private Plant15 Wheat;
		private Soil Soil;
		
		[EventSubscribe("Commencing")]
		private void OnSimulationCommencing(object sender, EventArgs e)
		{
			Zones = Apsim.FindAll(this, typeof(RectangularZone));
			foreach (Model m in Zones)
			{
				if (m.Name == ESWZoneName)
				{
					ESWZone = m as Zone;
					break;
				}
			}
			accumulatedRain = new Accumulator(this, "[Weather].Rain", RainDays);
		}
		
		[EventSubscribe("DoManagement")]
		private void OnDoManagement(object sender, EventArgs e)
		{		
			accumulatedRain.Update();
			
			Soil ESWSoil = Apsim.Find(ESWZone, typeof(Soil)) as Soil;
			
			foreach (Zone z in Zones)
			{
				Wheat = Apsim.Find(z, typeof(Plant15)) as Plant15;	
				Soil = Apsim.Find(z, typeof(Soil)) as Soil;
						
				if (Wheat != null && DateUtilities.WithinDates(StartDate, Clock.Today, EndDate) &&
				    Wheat.plant_status == "out" &&
				    ESWSoil.SoilWater.ESW > MinESW &&
				    accumulatedRain.Sum > MinRain)
				{
					Wheat.Sow(population: Population, cultivar: CultivarName, depth: SowingDepth, rowSpacing: RowSpacing);
					Fertiliser Fertiliser = Apsim.Find(Wheat.Parent, typeof(Fertiliser)) as Fertiliser;
					Fertiliser.Apply(Amount: Amount, Type: Fertiliser.Types.NO3N);
				}
			}
		}
	}
}
```
        Manager SowingRule
          StartDate = 1-may
          EndDate = 10-jul
          MinESW = 10
          ESWZoneName = 0 to 5m
          MinRain = 25
          RainDays = 7
          CultivarName = Hartog
          SowingDepth = 30
          RowSpacing = 250
          Population = 120
          Amount = 100
          CropName = wheat
          script: same as in Small Windbreak Example.WindbreakSystem.SowingRule
      RectangularZone TreeRow: Area=0.05; Slope=0; Length=100; Width=5
        LocalMicroClimate
        MicroClimate: air_pressure=1010; soil_emissivity=0.96; sun_angle=15; soil_heat_flux_fraction=0.4; night_interception_fraction=0.5; windspeed_default=3; refheight=2; albedo=0.15; emissivity=0.96; gsmax=0.01; r50=200; a_interception=0; b_interception=1; c_interception=0; d_interception=0; soil_albedo=0.3
        Report
          VariableNames:
            [Clock].Today
            [Zone].Area
            Distance
            Radn
            [LocalMicroClimate].Radn
            [TreeProxy].Shade
        Report DailyReport: EventNames=[Clock].DoReport
          VariableNames:
            [Clock].Today
            LocalMicroClimate.Wind
            sum([Soil].SoilWater.SWmm) as TotalSWmm
            sum([Soil].NO3N) as TotalNO3N
            sum([Soil].NH4N) as TotalNH4N
            [TreeProxy].WaterUptake
            [TreeProxy].Urel
            [TreeProxy].H
            [TreeProxy].heightToday
            [MicroClimate].peta
            [MicroClimate].petr
        Fertiliser
        Soil: ASCOrder=Vertosol; ASCSubOrder=Black; SoilType=Clay; Site=Norwin; NearestTown=Norwin; Region=Darling Downs and Granite Belt; State=Queensland; Country=Australia; NaturalVegetation=Qld. Bluegrass, possible Qld. Blue gum; ApsoilNumber=900; Latitude=-27.581836; Longitude=151.320206; LocationAccuracy=+/- 20m
          DataSource=CSIRO Sustainable Ecosystems, Toowoomba; Characteriesd as part of the GRDC funded project"Doing it better, doing it smarter, managing soil water in Australian agriculture' 2011
          Comments=OC, CLL for all crops estimated-based on Bongeen Mywybilla Soil No1
          Water
            Thickness  BD       AirDry    LL15      DUL       SAT       KS
            150        1.01056  0.13025   0.2605    0.521     0.588655  20
            150        1.07146  0.198689  0.248362  0.496723  0.565677  20
            300        1.09394  0.28      0.28      0.488438  0.557193  20
            300        1.15861  0.28      0.28      0.480297  0.532787  20
            300        1.17301  0.28      0.28      0.471584  0.527354  20
            300        1.16287  0.28      0.28      0.457071  0.53118   20
            300        1.1875   0.28      0.28      0.452332  0.521888  20
            SoilCrop WheatSoil: LL=[0.261, 0.248, 0.28, 0.306, 0.36, 0.392, 0.446]; KL=[0.06, 0.06, 0.06, 0.04, 0.04, 0.02, 0.01]; XF=[1, 1, 1, 1, 1, 1, 1]
          SoilWater: residueinterception=0; SummerDate=1-Nov; SummerU=5; SummerCona=5; WinterDate=1-Apr; WinterU=5; WinterCona=5; DiffusConst=40; DiffusSlope=16; Salb=0.12; CN2Bare=73; CNRed=20; CNCov=0.8; max_pond=0; Thickness=[150, 150, 300, 300, 300, 300, 300]; SWCON=[0.3, 0.3, 0.3, 0.3, 0.3, 0.3, 0.3]
          SoilNitrogen: fom_type=[default, manure, mucuna, lablab, shemp, stable]; fract_carb=[0.2, 0.3, 0.54, 0.57, 0.45, 0]; fract_cell=[0.7, 0.3, 0.37, 0.37, 0.47, 0.1]; fract_lign=[0.1, 0.4, 0.09, 0.06, 0.08, 0.9]; wfpsN2N2O_x=[22, 88]; wfpsN2N2O_y=[0.1, 1]
          SoilOrganicMatter: RootCN=40; RootWt=1000; SoilCN=12; EnrACoeff=7.4; EnrBCoeff=0.2; OCUnits=Total
            Thickness  OC    FBiom  FInert
            150        1.2   0.04   0.4
            150        0.96  0.02   0.6
            300        0.6   0.02   0.8
            300        0.3   0.02   1
            300        0.18  0.01   1
            300        0.12  0.01   1
            300        0.12  0.01   1
          Analysis: Thickness=[150, 150, 300, 300, 300, 300, 300]; PH=[8, 8, 8, 8, 8, 8, 8]; PHUnits=Water; BoronUnits=HotWater
          InitialWater: PercentMethod=EvenlyDistributed; FractionFull=1
          Sample InitialN: NO3Units=ppm; NH4Units=ppm; SWUnits=Volumetric; OCUnits=Total; PHUnits=Water
            Thickness  NO3  NH4
            150        1    0.1
            150        1    0.1
            300        1    0.1
            300        1    0.1
            300        1    0.1
            300        1    0.1
            300        1    0.1
          Fertiliser
        SurfaceOrganicMatter: PoolName=wheat_stubble; type=wheat; mass=500; standing_fraction=0; cnr=100; CriticalResidueWeight=2000; OptimumDecompTemp=20; MaxCumulativeEOS=20; CNRatioDecompCoeff=0.277; CNRatioDecompThreshold=25; TotalLeachRain=25; MinRainToLeach=10; CriticalMinimumOrganicC=0.004; DefaultCPRatio=0; DefaultStandingFraction=0; StandingExtinctCoeff=0.5; FractionFaecesAdded=0.5
          Pools:
            {PoolName=wheat_stubble, ResidueType=wheat, Mass=500, CNRatio=100, StandingFraction=0}
          ResidueTypes: LoadFromResource=ResidueTypes
      RectangularZone 0 to 5m: Area=0.05; Slope=0; Length=100; Width=5
        LocalMicroClimate
        MicroClimate: same as Small Windbreak Example.WindbreakSystem.TreeRow.MicroClimate
        Report: EventNames=[Wheat].Harvesting
          VariableNames:
            [Clock].Today
            Wheat.Zadok.Stage
            Wheat.Phenology.CurrentStageName
            Wheat.AboveGround.Wt
            Wheat.AboveGround.N
            Wheat.Grain.Yield
            Wheat.Grain.Protein
            Wheat.Grain.Size
            Wheat.Grain.GrainNo
            Wheat.Grain.Wt
            Wheat.Grain.N
            Wheat.Total.Wt
            [Zone].Area
            Field1.Area
            Distance
        Report DailyReport: EventNames=[Clock].DoReport
          VariableNames:
            [Clock].Today
            sum([Soil].SoilWater.SWmm) as TotalSWmm
            sum([Soil].NO3N) as TotalNO3N
            sum([Soil].NH4N) as TotalNH4N
            [Wheat].AboveGround.Wt
            [Wheat].EP
            LocalMicroClimate.Wind
            [MicroClimate].ga
            [MicroClimate].gc
            [Wheat].Leaf.LAI
            [Wheat].Leaf.CoverGreen
            [Wheat].height
            [Wheat].PotentialEP
            [TreeProxy].Urel
            [TreeProxy].H
            [TreeProxy].heightToday
            [MicroClimate].peta
            [MicroClimate].petr
        Fertiliser
        Soil: ASCOrder=Vertosol; ASCSubOrder=Black; SoilType=Clay; Site=Norwin; NearestTown=Norwin; Region=Darling Downs and Granite Belt; State=Queensland; Country=Australia; NaturalVegetation=Qld. Bluegrass, possible Qld. Blue gum; ApsoilNumber=900; Latitude=-27.581836; Longitude=151.320206; LocationAccuracy=+/- 20m
          DataSource=CSIRO Sustainable Ecosystems, Toowoomba; Characteriesd as part of the GRDC funded project"Doing it better, doing it smarter, managing soil water in Australian agriculture' 2011
          Comments=OC, CLL for all crops estimated-based on Bongeen Mywybilla Soil No1
          Water: same as Small Windbreak Example.WindbreakSystem.TreeRow.Soil.Water
          SoilWater: same as Small Windbreak Example.WindbreakSystem.TreeRow.Soil.SoilWater
          SoilNitrogen: fom_type=[default, manure, mucuna, lablab, shemp, stable]; fract_carb=[0.2, 0.3, 0.54, 0.57, 0.45, 0]; fract_cell=[0.7, 0.3, 0.37, 0.37, 0.47, 0.1]; fract_lign=[0.1, 0.4, 0.09, 0.06, 0.08, 0.9]; wfpsN2N2O_x=[22, 88]; wfpsN2N2O_y=[0.1, 1]
          SoilOrganicMatter: same as Small Windbreak Example.WindbreakSystem.TreeRow.Soil.SoilOrganicMatter
          Analysis: Thickness=[150, 150, 300, 300, 300, 300, 300]; PH=[8, 8, 8, 8, 8, 8, 8]; PHUnits=Water; BoronUnits=HotWater
          InitialWater: PercentMethod=EvenlyDistributed; FractionFull=1
          Sample InitialN: same as Small Windbreak Example.WindbreakSystem.TreeRow.Soil.InitialN
        SurfaceOrganicMatter: same as Small Windbreak Example.WindbreakSystem.TreeRow.SurfaceOrganicMatter
        Plant15 Wheat: AutoHarvest=true; CropType=Wheat
      RectangularZone 5 to 10m: Area=0.05; Slope=0; Length=100; Width=5
        LocalMicroClimate
        MicroClimate: same as Small Windbreak Example.WindbreakSystem.TreeRow.MicroClimate
        Report: EventNames=[Wheat].Harvesting
          VariableNames:
            [Clock].Today
            [Zone].LocalMicroClimate.Wind
            Wheat.Zadok.Stage
            Wheat.Phenology.CurrentStageName
            Wheat.AboveGround.Wt
            Wheat.AboveGround.N
            Wheat.Grain.Yield
            Wheat.Grain.Protein
            Wheat.Grain.Size
            Wheat.Grain.GrainNo
            Wheat.Grain.Wt
            Wheat.Grain.N
            Wheat.Total.Wt
            Distance
            [Zone].Area
        Report DailyReport: EventNames=[Clock].DoReport
          VariableNames:
            [Clock].Today
            LocalMicroClimate.Wind
            sum([Soil].SoilWater.SWmm) as TotalSWmm
            sum([Soil].NO3N) as TotalNO3N
            sum([Soil].NH4N) as TotalNH4N
            [Wheat].AboveGround.Wt
            [Wheat].EP
            [MicroClimate].ga
            [MicroClimate].gc
            [Wheat].Leaf.LAI
            [Wheat].Leaf.CoverGreen
            [Wheat].height
            [Wheat].PotentialEP
            [TreeProxy].Urel
            [TreeProxy].H
            [TreeProxy].heightToday
            [MicroClimate].peta
            [MicroClimate].petr
        Fertiliser
        Soil: same as Small Windbreak Example.WindbreakSystem.0 to 5m.Soil
        SurfaceOrganicMatter: same as Small Windbreak Example.WindbreakSystem.TreeRow.SurfaceOrganicMatter
        Plant15 Wheat: AutoHarvest=true; CropType=Wheat
      RectangularZone 10 to 15m: Area=0.05; Slope=0; Length=100; Width=5
        LocalMicroClimate
        MicroClimate: same as Small Windbreak Example.WindbreakSystem.TreeRow.MicroClimate
        Report: EventNames=[Wheat].Harvesting
          VariableNames:
            [Clock].Today
            Wheat.Zadok.Stage
            Wheat.Phenology.CurrentStageName
            Wheat.AboveGround.Wt
            Wheat.AboveGround.N
            Wheat.Grain.Yield
            Wheat.Grain.Protein
            Wheat.Grain.Size
            Wheat.Grain.GrainNo
            Wheat.Grain.Wt
            Wheat.Grain.N
            Wheat.Total.Wt
            Distance
            [Zone].Area
        Report DailyReport: EventNames=[Clock].DoReport
          VariableNames:
            [Clock].Today
            sum([Soil].SoilWater.SWmm) as TotalSWmm
            sum([Soil].NO3N) as TotalNO3N
            sum([Soil].NH4N) as TotalNH4N
            [Wheat].AboveGround.Wt
            [Wheat].EP
            LocalMicroClimate.Wind
            [MicroClimate].ga
            [MicroClimate].gc
            [Wheat].Leaf.LAI
            [Wheat].Leaf.CoverGreen
            [Wheat].height
            [Wheat].PotentialEP
            [MicroClimate].peta
            [MicroClimate].petr
        Fertiliser
        Soil: same as Small Windbreak Example.WindbreakSystem.0 to 5m.Soil
        SurfaceOrganicMatter: same as Small Windbreak Example.WindbreakSystem.TreeRow.SurfaceOrganicMatter
        Plant15 Wheat: AutoHarvest=true; CropType=Wheat
      RectangularZone 15 to 20m: Area=0.05; Slope=0; Length=100; Width=5
        LocalMicroClimate
        MicroClimate: same as Small Windbreak Example.WindbreakSystem.TreeRow.MicroClimate
        Report: same as Small Windbreak Example.WindbreakSystem.0 to 5m.Report
        Report DailyReport: same as Small Windbreak Example.WindbreakSystem.10 to 15m.DailyReport
        Fertiliser
        Soil: same as Small Windbreak Example.WindbreakSystem.0 to 5m.Soil
        SurfaceOrganicMatter: same as Small Windbreak Example.WindbreakSystem.TreeRow.SurfaceOrganicMatter
        Plant15 Wheat: AutoHarvest=true; CropType=Wheat
  Simulation Windbreak Example: Area=0; Slope=0
    Clock: StartDate=1900-01-01; EndDate=1900-12-31
    Summary SummaryFile
    Weather: FileName=DalbyWithWind.met
    SoilArbitrator Soil Arbitrator
    ForestrySystem WindbreakSystem: Area=3.05; Slope=0
      TreeProxy: NDemand=0; RootRadius=0; heights=[10000, 10000, 10000, 10000, 10000]
        Table=[[Parameter, 0, 0.5h, 1h, 1.5h, 2h, 2.5h, 3h, 4h, 5h, 6h], [Shade (%), Nitrogen Demand (kg/ha), Root Length Density (cm/cm3), Depth (cm), 0-15, 15-30, 30-60, 60-90, 90-120, 120-150, 150-180], [0, 0, , , .06, .05, .04, .02, .015, .01, 0], [0, 0, , , .06, .05, .04, .02, .015, .01, 0], [0, 0, , , .05, .04, .035, .02, .015, .01, 0], [0, 0, , , .04, .03, .03, .015, .01, .01, 0], [10, 0, , , .03, .02, .02, .01, 0, 0, 0], [0, 0, , , .02, .01, .01, 0, 0, 0, 0], [0, 0, , , .01, .005, .002, 0, 0, 0, 0], [0, 0, , , 0, 0, 0, 0, 0, 0, 0], [0, 0, , , 0, 0, 0, 0, 0, 0, 0], [0, 0, , , 0, 0, 0, 0, 0, 0, 0]]
        dates=[1900-01-01, 1900-03-01, 1900-06-01, 1900-09-01, 1900-12-31]
      Manager SowingRule
        StartDate = 1-may
        EndDate = 10-jul
        MinESW = 10
        ESWZoneName = 0 to 5m
        MinRain = 25
        RainDays = 7
        CultivarName = Hartog
        SowingDepth = 30
        RowSpacing = 250
        Population = 120
        Amount = 100
        CropName = wheat
        script: same as in Small Windbreak Example.WindbreakSystem.SowingRule
      RectangularZone TreeRow: Area=0.05; Slope=0; Length=100; Width=5
        LocalMicroClimate
        MicroClimate: same as Small Windbreak Example.WindbreakSystem.TreeRow.MicroClimate
        Report
          VariableNames:
            [Clock].Today
            [Zone].Area
            Distance
            Radn
            [LocalMicroClimate].Radn
            [TreeProxy].Shade
        Report DailyReport: EventNames=[Clock].DoReport
          VariableNames:
            [Clock].Today
            LocalMicroClimate.Wind
            sum([Soil].SoilWater.SWmm) as TotalSWmm
            sum([Soil].NO3N) as TotalNO3N
            sum([Soil].NH4N) as TotalNH4N
            [TreeProxy].Urel
            [TreeProxy].H
            [TreeProxy].heightToday
            [MicroClimate].peta
            [MicroClimate].petr
        Fertiliser
        Soil: same as Small Windbreak Example.WindbreakSystem.TreeRow.Soil
        SurfaceOrganicMatter: same as Small Windbreak Example.WindbreakSystem.TreeRow.SurfaceOrganicMatter
      RectangularZone 0 to 5m: same as Small Windbreak Example.WindbreakSystem.0 to 5m
      RectangularZone 5 to 10m: same as Small Windbreak Example.WindbreakSystem.5 to 10m
      RectangularZone 10 to 15m: same as Small Windbreak Example.WindbreakSystem.10 to 15m
      RectangularZone 15 to 20m: Area=0.05; Slope=0; Length=100; Width=5
        LocalMicroClimate
        MicroClimate: same as Small Windbreak Example.WindbreakSystem.TreeRow.MicroClimate
        Report: same as Small Windbreak Example.WindbreakSystem.0 to 5m.Report
        Report DailyReport: same as Small Windbreak Example.WindbreakSystem.10 to 15m.DailyReport
        Fertiliser
        Soil: same as Small Windbreak Example.WindbreakSystem.0 to 5m.Soil
        SurfaceOrganicMatter: same as Small Windbreak Example.WindbreakSystem.TreeRow.SurfaceOrganicMatter
        Plant15 Wheat: AutoHarvest=true; CropType=Wheat
      RectangularZone 20 to 25m: same as Windbreak Example.WindbreakSystem.15 to 20m
      RectangularZone 25 to 30m: same as Windbreak Example.WindbreakSystem.15 to 20m
      RectangularZone 30 to 35m: same as Windbreak Example.WindbreakSystem.15 to 20m
      RectangularZone 35 to 40m: same as Windbreak Example.WindbreakSystem.15 to 20m
      RectangularZone 40 to 50m: Area=0.1; Slope=0; Length=100; Width=10
        LocalMicroClimate
        MicroClimate: same as Small Windbreak Example.WindbreakSystem.TreeRow.MicroClimate
        Report: same as Small Windbreak Example.WindbreakSystem.0 to 5m.Report
        Report DailyReport: same as Small Windbreak Example.WindbreakSystem.10 to 15m.DailyReport
        Fertiliser
        Soil: same as Small Windbreak Example.WindbreakSystem.0 to 5m.Soil
        SurfaceOrganicMatter: same as Small Windbreak Example.WindbreakSystem.TreeRow.SurfaceOrganicMatter
        Plant15 Wheat: AutoHarvest=true; CropType=Wheat
      RectangularZone 50 to 75m: Area=0.25; Slope=0; Length=100; Width=25
        LocalMicroClimate
        MicroClimate: same as Small Windbreak Example.WindbreakSystem.TreeRow.MicroClimate
        Report: same as Small Windbreak Example.WindbreakSystem.0 to 5m.Report
        Report DailyReport: same as Small Windbreak Example.WindbreakSystem.10 to 15m.DailyReport
        Fertiliser
        Soil: same as Small Windbreak Example.WindbreakSystem.0 to 5m.Soil
        SurfaceOrganicMatter: same as Small Windbreak Example.WindbreakSystem.TreeRow.SurfaceOrganicMatter
        Plant15 Wheat: AutoHarvest=true; CropType=Wheat
      RectangularZone 75 to 100m: same as Windbreak Example.WindbreakSystem.50 to 75m
      RectangularZone 100 to 200m: Area=1; Slope=0; Length=100; Width=100
        LocalMicroClimate
        MicroClimate: same as Small Windbreak Example.WindbreakSystem.TreeRow.MicroClimate
        Report: same as Small Windbreak Example.WindbreakSystem.0 to 5m.Report
        Report DailyReport: same as Small Windbreak Example.WindbreakSystem.10 to 15m.DailyReport
        Fertiliser
        Soil: same as Small Windbreak Example.WindbreakSystem.0 to 5m.Soil
        SurfaceOrganicMatter: same as Small Windbreak Example.WindbreakSystem.TreeRow.SurfaceOrganicMatter
        Plant15 Wheat: AutoHarvest=true; CropType=Wheat
      RectangularZone 200 to 300m: same as Windbreak Example.WindbreakSystem.100 to 200m
  DataStore
  Simulation Single Tree Example: Area=0; Slope=0
    Clock: StartDate=1900-01-01; EndDate=1900-12-31
    Summary SummaryFile
    Weather: FileName=%root%\Examples\WeatherFiles\Dalby.met
    SoilArbitrator Soil Arbitrator
    ForestrySystem SingleTreeSystem: Area=0.19635; Slope=0
      TreeProxy: NDemand=0; RootRadius=0; heights=[1000, 2000, 3000, 4000, 5000]
        Table=[[Parameter, 0, 0.5h, 1h, 1.5h, 2h, 2.5h, 3h, 4h, 5h, 6h], [Shade (%), Nitrogen Demand (kg/ha), Root Length Density (cm/cm3), Depth (cm), 0-15, 15-30, 30-60, 60-90, 90-120, 120-150, 150-180], [60, 0, , , .06, .05, .04, .02, .015, .01, 0], [50, 0, , , .06, .05, .04, .02, .015, .01, 0], [40, 0, , , .05, .04, .035, .02, .015, .01, 0], [30, 0, , , .04, .03, .03, .015, .01, .01, 0], [20, 0, , , .03, .02, .02, .01, 0, 0, 0], [0, 0, , , .02, .01, .01, 0, 0, 0, 0], [0, 0, , , .01, .005, .002, 0, 0, 0, 0], [0, 0, , , 0, 0, 0, 0, 0, 0, 0], [0, 0, , , 0, 0, 0, 0, 0, 0, 0], [0, 0, , , 0, 0, 0, 0, 0, 0, 0]]
        dates=[1900-01-01, 1900-03-01, 1900-06-01, 1900-09-01, 1900-12-31]
      Manager SowingRule
        StartDate = 1-may
        EndDate = 10-jul
        MinESW = 10
        ESWZoneName = 0 to 5m
        MinRain = 25
        RainDays = 7
        CultivarName = Hartog
        SowingDepth = 30
        RowSpacing = 250
        Population = 120
        Amount = 100
        CropName = wheat
```csharp
using System;
using System.Collections.Generic;
using Models.Core;
using Models.Agroforestry;
using Models.PMF.OldPlant;
using Models.Soils;
using Models.Utilities;
using Models.Zones;
using APSIM.Shared.Utilities;

namespace Models
{
	[Serializable]
	public class Script : Model
	{
		[Link] Clock Clock;
		[Link] Summary Summary;
		Accumulator accumulatedRain;
		
		[Description("Start of sowing window (d-mmm)")]
		public string StartDate { get; set; }
		[Description("End of sowing window (d-mmm)")]
		public string EndDate { get; set; }
		[Description("Minimum extractable soil water for sowing (mm)")]
		public double MinESW { get; set; }
		[Description("Name of Zone to use for minimum ESW condition")]
		public string ESWZoneName { get; set; }
		[Description("Accumulated rainfall required for sowing (mm)")]
		public double MinRain { get; set; }
		[Description("Duration of rainfall accumulation (d)")]
		public int RainDays { get; set; }
		[Description("Cultivar to be sown")]
		public string CultivarName { get; set; }
		[Description("Sowing depth (mm)")]
		public double SowingDepth { get; set; }
		[Description("Row spacing (mm)")]
		public double RowSpacing { get; set; }
		[Description("Plant population (/m2)")]
		public double Population { get; set; }
		[Description("Amount of fertiliser to be applied (kg/ha)")]
		public double Amount { get; set; }
		[Description("Crop to be fertilised")]
		public string CropName { get; set; }
		
		private Zone ESWZone;
		private List<IModel> Zones;
		private Plant15 Wheat;
		private Soil Soil;
		
		[EventSubscribe("Commencing")]
		private void OnSimulationCommencing(object sender, EventArgs e)
		{
			Zones = Apsim.FindAll(this, typeof(CircularZone));
			foreach (Model m in Zones)
			{
				if (m.Name == ESWZoneName)
				{
					ESWZone = m as Zone;
					break;
				}
			}
			accumulatedRain = new Accumulator(this, "[Weather].Rain", RainDays);
		}
		
		[EventSubscribe("DoManagement")]
		private void OnDoManagement(object sender, EventArgs e)
		{		
			accumulatedRain.Update();
			
			Soil ESWSoil = Apsim.Find(ESWZone, typeof(Soil)) as Soil;
			
			foreach (Zone z in Zones)
			{
				Wheat = Apsim.Find(z, typeof(Plant15)) as Plant15;	
				Soil = Apsim.Find(z, typeof(Soil)) as Soil;
						
				if (Wheat != null && DateUtilities.WithinDates(StartDate, Clock.Today, EndDate) &&
				    Wheat.plant_status == "out" &&
				    ESWSoil.SoilWater.ESW > MinESW &&
				    accumulatedRain.Sum > MinRain)
				{
					Wheat.Sow(population: Population, cultivar: CultivarName, depth: SowingDepth, rowSpacing: RowSpacing);
					Fertiliser Fertiliser = Apsim.Find(Wheat.Parent, typeof(Fertiliser)) as Fertiliser;
					Fertiliser.Apply(Amount: Amount, Type: Fertiliser.Types.NO3N);
				}
			}
		}
	}
}
```
      CircularZone 0 to 5m: Area=0.00785398; Slope=0; Radius=5; Width=5
        LocalMicroClimate
        MicroClimate: same as Small Windbreak Example.WindbreakSystem.TreeRow.MicroClimate
        Report: EventNames=[Wheat].Harvesting
          VariableNames:
            [Clock].Today
            Wheat.Zadok.Stage
            Wheat.Phenology.CurrentStageName
            Wheat.AboveGround.Wt
            Wheat.AboveGround.N
            Wheat.Grain.Yield
            Wheat.Grain.Protein
            Wheat.Grain.Size
            Wheat.Grain.GrainNo
            Wheat.Grain.Wt
            Wheat.Grain.N
            Wheat.Total.Wt
            Area
            Distance
        Report DailyReport: EventNames=[Clock].DoReport
          VariableNames:
            [Clock].Today
            sum([Soil].SoilWater.SWmm) as TotalSWmm
            sum([Soil].NO3N) as TotalNO3N
            sum([Soil].NH4N) as TotalNH4N
            [Wheat].AboveGround.Wt
            [Wheat].EP
            LocalMicroClimate.Wind
            [MicroClimate].ga
            [MicroClimate].gc
            [Wheat].Leaf.LAI
            [Wheat].Leaf.CoverGreen
            [Wheat].height
            [Wheat].PotentialEP
        Fertiliser
        Soil: same as Small Windbreak Example.WindbreakSystem.0 to 5m.Soil
        SurfaceOrganicMatter: same as Small Windbreak Example.WindbreakSystem.TreeRow.SurfaceOrganicMatter
        Plant15 Wheat: AutoHarvest=true; CropType=Wheat
      CircularZone 5 to 10m: Area=0.0235619; Slope=0; Radius=10; Width=5
        LocalMicroClimate
        Report: EventNames=[Wheat].Harvesting
          VariableNames:
            [Clock].Today
            Wheat.Zadok.Stage
            Wheat.Phenology.CurrentStageName
            Wheat.AboveGround.Wt
            Wheat.AboveGround.N
            Wheat.Grain.Yield
            Wheat.Grain.Protein
            Wheat.Grain.Size
            Wheat.Grain.GrainNo
            Wheat.Grain.Wt
            Wheat.Grain.N
            Wheat.Total.Wt
            Distance
            Area
        Report DailyReport: same as Single Tree Example.SingleTreeSystem.0 to 5m.DailyReport
        Fertiliser
        Soil: same as Small Windbreak Example.WindbreakSystem.0 to 5m.Soil
        SurfaceOrganicMatter: same as Small Windbreak Example.WindbreakSystem.TreeRow.SurfaceOrganicMatter
        Plant15 Wheat: AutoHarvest=true; CropType=Wheat
        MicroClimate: same as Small Windbreak Example.WindbreakSystem.TreeRow.MicroClimate
      CircularZone 10 to 15m: Area=0.0392699; Slope=0; Radius=15; Width=5
        LocalMicroClimate
        Report: EventNames=[Wheat].Harvesting
          VariableNames:
            [Clock].Today
            Wheat.Zadok.Stage
            Wheat.Phenology.CurrentStageName
            Wheat.AboveGround.Wt
            Wheat.AboveGround.N
            Wheat.Grain.Yield
            Wheat.Grain.Protein
            Wheat.Grain.Size
            Wheat.Grain.GrainNo
            Wheat.Grain.Wt
            Wheat.Grain.N
            Wheat.Total.Wt
            Distance
            Area
        Report DailyReport: same as Single Tree Example.SingleTreeSystem.0 to 5m.DailyReport
        Fertiliser
        Soil: same as Small Windbreak Example.WindbreakSystem.0 to 5m.Soil
        SurfaceOrganicMatter: same as Small Windbreak Example.WindbreakSystem.TreeRow.SurfaceOrganicMatter
        Plant15 Wheat: AutoHarvest=true; CropType=Wheat
        MicroClimate: same as Small Windbreak Example.WindbreakSystem.TreeRow.MicroClimate
      CircularZone 15 to 20m: Area=0.0549779; Slope=0; Radius=20; Width=5
        LocalMicroClimate
        MicroClimate: same as Small Windbreak Example.WindbreakSystem.TreeRow.MicroClimate
        Report: EventNames=[Wheat].Harvesting
          VariableNames:
            [Clock].Today
            Wheat.Zadok.Stage
            Wheat.Phenology.CurrentStageName
            Wheat.AboveGround.Wt
            Wheat.AboveGround.N
            Wheat.Grain.Yield
            Wheat.Grain.Protein
            Wheat.Grain.Size
            Wheat.Grain.GrainNo
            Wheat.Grain.Wt
            Wheat.Grain.N
            Wheat.Total.Wt
            Area
            Distance
        Report DailyReport: same as Single Tree Example.SingleTreeSystem.0 to 5m.DailyReport
        Fertiliser
        Soil: same as Small Windbreak Example.WindbreakSystem.0 to 5m.Soil
        SurfaceOrganicMatter: same as Small Windbreak Example.WindbreakSystem.TreeRow.SurfaceOrganicMatter
        Plant15 Wheat: AutoHarvest=true; CropType=Wheat
      CircularZone 20 to 25m: Area=0.0706858; Slope=0; Radius=25; Width=5
        LocalMicroClimate
        MicroClimate: same as Small Windbreak Example.WindbreakSystem.TreeRow.MicroClimate
        Report: EventNames=[Wheat].Harvesting
          VariableNames:
            [Clock].Today
            Wheat.Zadok.Stage
            Wheat.Phenology.CurrentStageName
            Wheat.AboveGround.Wt
            Wheat.AboveGround.N
            Wheat.Grain.Yield
            Wheat.Grain.Protein
            Wheat.Grain.Size
            Wheat.Grain.GrainNo
            Wheat.Grain.Wt
            Wheat.Grain.N
            Wheat.Total.Wt
            Area
            Distance
        Report DailyReport: same as Single Tree Example.SingleTreeSystem.0 to 5m.DailyReport
        Fertiliser
        Soil: same as Small Windbreak Example.WindbreakSystem.0 to 5m.Soil
        SurfaceOrganicMatter: same as Small Windbreak Example.WindbreakSystem.TreeRow.SurfaceOrganicMatter
        Plant15 Wheat: AutoHarvest=true; CropType=Wheat
  Folder Validation
    Simulation WarraFallow: Area=0; Slope=0
      Clock: StartDate=2004-03-22; EndDate=2004-12-31
      Summary SummaryFile
      Weather: FileName=Validation\warra.met
      SoilArbitrator Soil Arbitrator
      ForestrySystem WindbreakSystem: Area=0.55; Slope=0
        TreeProxy: NDemand=0; RootRadius=0; heights=[10000, 10000, 10000, 10000, 10000]
          Table=[[Parameter, 0, 0.5h, 1h, 1.5h, 2h, 2.5h, 3h, 4h, 5h, 6h], [Shade (%), Nitrogen Demand (kg/ha), Root Length Density (cm/cm3), Depth (cm), 0-15, 15-30, 30-60, 60-90, 90-120, 120-150], [100, 0, , , .06, .05, .04, .02, .015, .01], [0, 0, , , .06, .05, .04, .02, .015, .01], [0, 0, , , .05, .04, .035, .02, .015, .01], [0, 0, , , .04, .03, .03, .015, .01, .01], [0, 0, , , .03, .02, .02, .01, 0, 0], [0, 0, , , .02, .01, .01, 0, 0, 0], [0, 0, , , .01, .005, .002, 0, 0, 0], [0, 0, , , 0, 0, 0, 0, 0, 0], [0, 0, , , 0, 0, 0, 0, 0, 0], [0, 0, , , 0, 0, 0, 0, 0, 0]]
          dates=[1900-01-01, 1900-03-01, 1900-06-01, 1900-09-01, 1900-12-31]
        RectangularZone TreeRow: Area=0.05; Slope=0; Length=100; Width=5
          LocalMicroClimate
          MicroClimate: air_pressure=1010; soil_emissivity=0.96; sun_angle=15; soil_heat_flux_fraction=0.4; night_interception_fraction=0.5; windspeed_default=3; refheight=2; albedo=0.15; emissivity=0.96; gsmax=0.01; r50=200; a_interception=0; b_interception=0; c_interception=0; d_interception=0; soil_albedo=0.23
          Report
            VariableNames:
              [Clock].Today
              [Zone].Area
              Distance
              Radn
              [LocalMicroClimate].Radn
              [TreeProxy].Shade
          Report DailyReport: EventNames=[Clock].DoReport
            VariableNames:
              [Clock].Today
              Distance
              LocalMicroClimate.Wind
              sum([Soil].NO3N) as TotalNO3N
              sum([Soil].NH4N) as TotalNH4N
              sum([TreeProxy].WaterUptake) as WaterUptake
              sum([Soil].SoilWater.SWmm[1:4]) as WaterTo90
              [TreeProxy].Urel
              [TreeProxy].H
              [TreeProxy].SWDemand
              [TreeProxy].heightToday
              [MicroClimate].peta
              [MicroClimate].petr
              [Soil].SoilWater.Eo
              [TreeProxy].WaterStress
          Fertiliser
          SurfaceOrganicMatter: same as Small Windbreak Example.WindbreakSystem.TreeRow.SurfaceOrganicMatter
          Soil: ASCOrder=Vertosol; ASCSubOrder=Grey; SoilType=Clay; Site=Warra; NearestTown=Warra, Q, 4411; Region=Darling Downs and Granite Belt; State=Queensland; Country=Australia; NaturalVegetation=Brigalow scrub; ApsoilNumber=19; Latitude=-26.897; Longitude=150.909; LocationAccuracy=+/- 20m; DataSource=0; Comments=CSIRO Sustainable Ecosystems, Toowoomba
            Water
              Thickness  BD    AirDry  LL15  DUL   SAT   KS
              150        1.39  0.105   0.22  0.4   0.45  20
              150        1.35  0.168   0.21  0.41  0.46  20
              300        1.35  0.22    0.22  0.41  0.46  20
              300        1.43  0.22    0.24  0.38  0.43  20
              300        1.44  0.22    0.26  0.38  0.43  20
              300        1.45  0.22    0.34  0.37  0.42  20
            SoilWater: residueinterception=0; SummerDate=1-Nov; SummerU=6; SummerCona=3.5; WinterDate=1-Apr; WinterU=4; WinterCona=2.5; DiffusConst=40; DiffusSlope=16; Salb=0.12; CN2Bare=73; CNRed=20; CNCov=0.8; max_pond=0; Thickness=[150, 150, 300, 300, 300, 300]; SWCON=[0.3, 0.3, 0.3, 0.3, 0.3, 0.3]
            SoilNitrogen: fom_type=[default, manure, mucuna, lablab, shemp, stable]; fract_carb=[0.2, 0.3, 0.54, 0.57, 0.45, 0]; fract_cell=[0.7, 0.3, 0.37, 0.37, 0.47, 0.1]; fract_lign=[0.1, 0.4, 0.09, 0.06, 0.08, 0.9]; wfpsN2N2O_x=[22, 88]; wfpsN2N2O_y=[0.1, 1]
            SoilOrganicMatter: RootCN=40; RootWt=1000; SoilCN=12; EnrACoeff=7.4; EnrBCoeff=0.2; OCUnits=Total
              Thickness  OC     FBiom  FInert
              150        0.915  0.04   0.4
              150        0.777  0.02   0.6
              300        0.346  0.02   0.8
              300        0.231  0.02   1
              300        0.154  0.01   1
              300        0.123  0.01   1
            Analysis: Thickness=[150, 150, 300, 300, 300, 300]; PH=[8, 8, 8, 8, 8, 8]; PHUnits=Water; BoronUnits=HotWater
            Sample InitialN: NO3Units=ppm; NH4Units=ppm; SWUnits=Volumetric; OCUnits=Total; PHUnits=Water
              Thickness  NO3  NH4  SW
              150        1    0.1  0.1892
              150        1    0.1  0.1892
              300        1    0.1  0.258
              300        1    0.1  0.2838
              300        1    0.1  0.301
              300        1    0.1  0.3182
            Fertiliser
        RectangularZone 5m: Area=0.05; Slope=0; Length=100; Width=5
          LocalMicroClimate
          MicroClimate: same as Validation.WarraFallow.WindbreakSystem.TreeRow.MicroClimate
          Report
            VariableNames:
              [Clock].Today
              [Zone].Area
              Distance
              Radn
              [LocalMicroClimate].Radn
              [TreeProxy].Shade
          Report DailyReport: EventNames=[Clock].DoReport
            VariableNames:
              [Clock].Today
              Distance
              LocalMicroClimate.Wind
              sum([Soil].SoilWater.SWmm[1:4]) as WaterTo90
              sum([Soil].NO3N) as TotalNO3N
              sum([Soil].NH4N) as TotalNH4N
              [MicroClimate].peta
              [MicroClimate].petr
          Fertiliser
          SurfaceOrganicMatter: same as Small Windbreak Example.WindbreakSystem.TreeRow.SurfaceOrganicMatter
          Soil: ASCOrder=Vertosol; ASCSubOrder=Grey; SoilType=Clay; Site=Warra; NearestTown=Warra, Q, 4411; Region=Darling Downs and Granite Belt; State=Queensland; Country=Australia; NaturalVegetation=Brigalow scrub; ApsoilNumber=19; Latitude=-26.897; Longitude=150.909; LocationAccuracy=+/- 20m; DataSource=0; Comments=CSIRO Sustainable Ecosystems, Toowoomba
            Water
              Thickness  BD    AirDry  LL15  DUL   SAT
              150        1.39  0.105   0.22  0.4   0.45
              150        1.35  0.168   0.21  0.41  0.46
              300        1.35  0.22    0.22  0.41  0.46
              300        1.43  0.22    0.24  0.38  0.43
              300        1.44  0.22    0.26  0.38  0.43
              300        1.45  0.22    0.34  0.37  0.42
            SoilWater: same as Validation.WarraFallow.WindbreakSystem.TreeRow.Soil.SoilWater
            SoilNitrogen: fom_type=[default, manure, mucuna, lablab, shemp, stable]; fract_carb=[0.2, 0.3, 0.54, 0.57, 0.45, 0]; fract_cell=[0.7, 0.3, 0.37, 0.37, 0.47, 0.1]; fract_lign=[0.1, 0.4, 0.09, 0.06, 0.08, 0.9]; wfpsN2N2O_x=[22, 88]; wfpsN2N2O_y=[0.1, 1]
            SoilOrganicMatter: same as Validation.WarraFallow.WindbreakSystem.TreeRow.Soil.SoilOrganicMatter
            Analysis: Thickness=[150, 150, 300, 300, 300, 300]; PH=[8, 8, 8, 8, 8, 8]; PHUnits=Water; BoronUnits=HotWater
            Sample: NO3Units=ppm; NH4Units=ppm; SWUnits=Volumetric; OCUnits=Total; PHUnits=Water
              Thickness  NO3  NH4  SW
              150        1    0.1  0.19668
              150        1    0.1  0.19668
              300        1    0.1  0.2682
              300        1    0.1  0.29502
              300        1    0.1  0.3129
              300        1    0.1  0.33078
        RectangularZone 10m: Area=0.05; Slope=0; Length=100; Width=5
          LocalMicroClimate
          MicroClimate: same as Validation.WarraFallow.WindbreakSystem.TreeRow.MicroClimate
          Report
            VariableNames:
              [Clock].Today
              Distance
              [Zone].Area
              Distance
              Radn
              [LocalMicroClimate].Radn
              [TreeProxy].Shade
          Report DailyReport: EventNames=[Clock].DoReport
            VariableNames:
              [Clock].Today
              Distance
              LocalMicroClimate.Wind
              sum([Soil].SoilWater.SWmm[1:4]) as WaterTo90
              sum([Soil].NO3N) as TotalNO3N
              sum([Soil].NH4N) as TotalNH4N
              [MicroClimate].peta
              [MicroClimate].petr
          Fertiliser
          SurfaceOrganicMatter: same as Small Windbreak Example.WindbreakSystem.TreeRow.SurfaceOrganicMatter
          Soil: ASCOrder=Vertosol; ASCSubOrder=Grey; SoilType=Clay; Site=Warra; NearestTown=Warra, Q, 4411; Region=Darling Downs and Granite Belt; State=Queensland; Country=Australia; NaturalVegetation=Brigalow scrub; ApsoilNumber=19; Latitude=-26.897; Longitude=150.909; LocationAccuracy=+/- 20m; DataSource=0; Comments=CSIRO Sustainable Ecosystems, Toowoomba
            Water
              Thickness  BD    AirDry  LL15  DUL   SAT
              150        1.39  0.105   0.22  0.4   0.45
              150        1.35  0.168   0.21  0.41  0.46
              300        1.35  0.22    0.22  0.41  0.46
              300        1.43  0.22    0.24  0.38  0.43
              300        1.44  0.22    0.26  0.38  0.43
              300        1.45  0.22    0.34  0.37  0.42
            SoilWater: same as Validation.WarraFallow.WindbreakSystem.TreeRow.Soil.SoilWater
            SoilNitrogen: fom_type=[default, manure, mucuna, lablab, shemp, stable]; fract_carb=[0.2, 0.3, 0.54, 0.57, 0.45, 0]; fract_cell=[0.7, 0.3, 0.37, 0.37, 0.47, 0.1]; fract_lign=[0.1, 0.4, 0.09, 0.06, 0.08, 0.9]; wfpsN2N2O_x=[22, 88]; wfpsN2N2O_y=[0.1, 1]
            SoilOrganicMatter: same as Validation.WarraFallow.WindbreakSystem.TreeRow.Soil.SoilOrganicMatter
            Analysis: Thickness=[150, 150, 300, 300, 300, 300]; PH=[8, 8, 8, 8, 8, 8]; PHUnits=Water; BoronUnits=HotWater
            Sample: NO3Units=ppm; NH4Units=ppm; SWUnits=Volumetric; OCUnits=Total; PHUnits=Water
              Thickness  NO3  NH4  SW
              150        1    0.1  0.235271
              150        1    0.1  0.235271
              300        1    0.1  0.320824
              300        1    0.1  0.352906
              300        1    0.1  0.374294
              300        1    0.1  0.395682
        RectangularZone 15m: Area=0.05; Slope=0; Length=100; Width=5
          LocalMicroClimate
          MicroClimate: same as Validation.WarraFallow.WindbreakSystem.TreeRow.MicroClimate
          Report
            VariableNames:
              [Clock].Today
              [Zone].Area
              Distance
              Radn
              [LocalMicroClimate].Radn
              [TreeProxy].Shade
          Report DailyReport: EventNames=[Clock].DoReport
            VariableNames:
              [Clock].Today
              Distance
              LocalMicroClimate.Wind
              sum([Soil].SoilWater.SWmm[1:4]) as WaterTo90
              sum([Soil].NO3N) as TotalNO3N
              sum([Soil].NH4N) as TotalNH4N
              [MicroClimate].peta
              [MicroClimate].petr
          Fertiliser
          SurfaceOrganicMatter: same as Small Windbreak Example.WindbreakSystem.TreeRow.SurfaceOrganicMatter
          Soil: ASCOrder=Vertosol; ASCSubOrder=Grey; SoilType=Clay; Site=Warra; NearestTown=Warra, Q, 4411; Region=Darling Downs and Granite Belt; State=Queensland; Country=Australia; NaturalVegetation=Brigalow scrub; ApsoilNumber=19; Latitude=-26.897; Longitude=150.909; LocationAccuracy=+/- 20m; DataSource=0; Comments=CSIRO Sustainable Ecosystems, Toowoomba
            Water
              Thickness  BD    AirDry  LL15  DUL   SAT
              150        1.39  0.105   0.22  0.4   0.45
              150        1.35  0.168   0.21  0.41  0.46
              300        1.35  0.22    0.22  0.41  0.46
              300        1.43  0.22    0.24  0.38  0.43
              300        1.44  0.22    0.26  0.38  0.43
              300        1.45  0.22    0.34  0.37  0.42
            SoilWater: same as Validation.WarraFallow.WindbreakSystem.TreeRow.Soil.SoilWater
            SoilNitrogen: fom_type=[default, manure, mucuna, lablab, shemp, stable]; fract_carb=[0.2, 0.3, 0.54, 0.57, 0.45, 0]; fract_cell=[0.7, 0.3, 0.37, 0.37, 0.47, 0.1]; fract_lign=[0.1, 0.4, 0.09, 0.06, 0.08, 0.9]; wfpsN2N2O_x=[22, 88]; wfpsN2N2O_y=[0.1, 1]
            SoilOrganicMatter: same as Validation.WarraFallow.WindbreakSystem.TreeRow.Soil.SoilOrganicMatter
            Analysis: Thickness=[150, 150, 300, 300, 300, 300]; PH=[8, 8, 8, 8, 8, 8]; PHUnits=Water; BoronUnits=HotWater
            Sample: NO3Units=ppm; NH4Units=ppm; SWUnits=Volumetric; OCUnits=Total; PHUnits=Water
              Thickness  NO3  NH4  SW
              150        1    0.1  0.254424
              150        1    0.1  0.254424
              300        1    0.1  0.346941
              300        1    0.1  0.381635
              300        1    0.1  0.404765
              300        1    0.1  0.427894
        RectangularZone 20m: Area=0.05; Slope=0; Length=100; Width=5
          LocalMicroClimate
          MicroClimate: same as Validation.WarraFallow.WindbreakSystem.TreeRow.MicroClimate
          Report
            VariableNames:
              [Clock].Today
              [Zone].Area
              Distance
              Radn
              [LocalMicroClimate].Radn
              [TreeProxy].Shade
          Report DailyReport: EventNames=[Clock].DoReport
            VariableNames:
              [Clock].Today
              Distance
              LocalMicroClimate.Wind
              sum([Soil].SoilWater.SWmm[1:4]) as WaterTo90
              sum([Soil].NO3N) as TotalNO3N
              sum([Soil].NH4N) as TotalNH4N
              [MicroClimate].peta
              [MicroClimate].petr
          Fertiliser
          SurfaceOrganicMatter: same as Small Windbreak Example.WindbreakSystem.TreeRow.SurfaceOrganicMatter
          Soil: ASCOrder=Vertosol; ASCSubOrder=Grey; SoilType=Clay; Site=Warra; NearestTown=Warra, Q, 4411; Region=Darling Downs and Granite Belt; State=Queensland; Country=Australia; NaturalVegetation=Brigalow scrub; ApsoilNumber=19; Latitude=-26.897; Longitude=150.909; LocationAccuracy=+/- 20m; DataSource=0; Comments=CSIRO Sustainable Ecosystems, Toowoomba
            Water
              Thickness  BD    AirDry  LL15  DUL   SAT
              150        1.39  0.105   0.22  0.4   0.45
              150        1.35  0.168   0.21  0.41  0.46
              300        1.35  0.22    0.22  0.41  0.46
              300        1.43  0.22    0.24  0.38  0.43
              300        1.44  0.22    0.26  0.38  0.43
              300        1.45  0.22    0.34  0.37  0.42
            SoilWater: same as Validation.WarraFallow.WindbreakSystem.TreeRow.Soil.SoilWater
            SoilNitrogen: fom_type=[default, manure, mucuna, lablab, shemp, stable]; fract_carb=[0.2, 0.3, 0.54, 0.57, 0.45, 0]; fract_cell=[0.7, 0.3, 0.37, 0.37, 0.47, 0.1]; fract_lign=[0.1, 0.4, 0.09, 0.06, 0.08, 0.9]; wfpsN2N2O_x=[22, 88]; wfpsN2N2O_y=[0.1, 1]
            SoilOrganicMatter: same as Validation.WarraFallow.WindbreakSystem.TreeRow.Soil.SoilOrganicMatter
            Analysis: Thickness=[150, 150, 300, 300, 300, 300]; PH=[8, 8, 8, 8, 8, 8]; PHUnits=Water; BoronUnits=HotWater
            Sample: NO3Units=ppm; NH4Units=ppm; SWUnits=Volumetric; OCUnits=Total; PHUnits=Water
              Thickness  NO3  NH4  SW
              150        1    0.1  0.27362
              150        1    0.1  0.27362
              300        1    0.1  0.373118
              300        1    0.1  0.410429
              300        1    0.1  0.27362
              300        1    0.1  0.27362
        RectangularZone 25m: Area=0.05; Slope=0; Length=100; Width=5
          LocalMicroClimate
          MicroClimate: same as Validation.WarraFallow.WindbreakSystem.TreeRow.MicroClimate
          Report
            VariableNames:
              [Clock].Today
              [Zone].Area
              Distance
              Radn
              [LocalMicroClimate].Radn
              [TreeProxy].Shade
          Report DailyReport: EventNames=[Clock].DoReport
            VariableNames:
              [Clock].Today
              Distance
              LocalMicroClimate.Wind
              sum([Soil].SoilWater.SWmm[1:4]) as WaterTo90
              sum([Soil].NO3N) as TotalNO3N
              sum([Soil].NH4N) as TotalNH4N
              [MicroClimate].peta
              [MicroClimate].petr
          Fertiliser
          SurfaceOrganicMatter: same as Small Windbreak Example.WindbreakSystem.TreeRow.SurfaceOrganicMatter
          Soil: ASCOrder=Vertosol; ASCSubOrder=Grey; SoilType=Clay; Site=Warra; NearestTown=Warra, Q, 4411; Region=Darling Downs and Granite Belt; State=Queensland; Country=Australia; NaturalVegetation=Brigalow scrub; ApsoilNumber=19; Latitude=-26.897; Longitude=150.909; LocationAccuracy=+/- 20m; DataSource=0; Comments=CSIRO Sustainable Ecosystems, Toowoomba
            Water
              Thickness  BD    AirDry  LL15  DUL   SAT
              150        1.39  0.105   0.22  0.4   0.45
              150        1.35  0.168   0.21  0.41  0.46
              300        1.35  0.22    0.22  0.41  0.46
              300        1.43  0.22    0.24  0.38  0.43
              300        1.44  0.22    0.26  0.38  0.43
              300        1.45  0.22    0.34  0.37  0.42
            SoilWater: same as Validation.WarraFallow.WindbreakSystem.TreeRow.Soil.SoilWater
            SoilNitrogen: fom_type=[default, manure, mucuna, lablab, shemp, stable]; fract_carb=[0.2, 0.3, 0.54, 0.57, 0.45, 0]; fract_cell=[0.7, 0.3, 0.37, 0.37, 0.47, 0.1]; fract_lign=[0.1, 0.4, 0.09, 0.06, 0.08, 0.9]; wfpsN2N2O_x=[22, 88]; wfpsN2N2O_y=[0.1, 1]
            SoilOrganicMatter: same as Validation.WarraFallow.WindbreakSystem.TreeRow.Soil.SoilOrganicMatter
            Analysis: Thickness=[150, 150, 300, 300, 300, 300]; PH=[8, 8, 8, 8, 8, 8]; PHUnits=Water; BoronUnits=HotWater
            Sample: NO3Units=ppm; NH4Units=ppm; SWUnits=Volumetric; OCUnits=Total; PHUnits=Water
              Thickness  NO3  NH4  SW
              150        1    0.1  0.271333
              150        1    0.1  0.271333
              300        1    0.1  0.37
              300        1    0.1  0.407
              300        1    0.1  0.271333
              300        1    0.1  0.271333
        RectangularZone 30m: Area=0.05; Slope=0; Length=100; Width=5
          LocalMicroClimate
          MicroClimate: same as Validation.WarraFallow.WindbreakSystem.TreeRow.MicroClimate
          Report
            VariableNames:
              [Clock].Today
              [Zone].Area
              Distance
              Radn
              [LocalMicroClimate].Radn
              [TreeProxy].Shade
          Report DailyReport: EventNames=[Clock].DoReport
            VariableNames:
              [Clock].Today
              Distance
              LocalMicroClimate.Wind
              sum([Soil].SoilWater.SWmm[1:4]) as WaterTo90
              sum([Soil].NO3N) as TotalNO3N
              sum([Soil].NH4N) as TotalNH4N
              [MicroClimate].peta
              [MicroClimate].petr
          Fertiliser
          SurfaceOrganicMatter: same as Small Windbreak Example.WindbreakSystem.TreeRow.SurfaceOrganicMatter
          Soil: ASCOrder=Vertosol; ASCSubOrder=Grey; SoilType=Clay; Site=Warra; NearestTown=Warra, Q, 4411; Region=Darling Downs and Granite Belt; State=Queensland; Country=Australia; NaturalVegetation=Brigalow scrub; ApsoilNumber=19; Latitude=-26.897; Longitude=150.909; LocationAccuracy=+/- 20m; DataSource=0; Comments=CSIRO Sustainable Ecosystems, Toowoomba
            Water
              Thickness  BD    AirDry  LL15  DUL   SAT
              150        1.39  0.105   0.22  0.4   0.45
              150        1.35  0.168   0.21  0.41  0.46
              300        1.35  0.22    0.22  0.41  0.46
              300        1.43  0.22    0.24  0.38  0.43
              300        1.44  0.22    0.26  0.38  0.43
              300        1.45  0.22    0.34  0.37  0.42
            SoilWater: same as Validation.WarraFallow.WindbreakSystem.TreeRow.Soil.SoilWater
            SoilNitrogen: fom_type=[default, manure, mucuna, lablab, shemp, stable]; fract_carb=[0.2, 0.3, 0.54, 0.57, 0.45, 0]; fract_cell=[0.7, 0.3, 0.37, 0.37, 0.47, 0.1]; fract_lign=[0.1, 0.4, 0.09, 0.06, 0.08, 0.9]; wfpsN2N2O_x=[22, 88]; wfpsN2N2O_y=[0.1, 1]
            SoilOrganicMatter: same as Validation.WarraFallow.WindbreakSystem.TreeRow.Soil.SoilOrganicMatter
            Analysis: Thickness=[150, 150, 300, 300, 300, 300]; PH=[8, 8, 8, 8, 8, 8]; PHUnits=Water; BoronUnits=HotWater
            Sample: NO3Units=ppm; NH4Units=ppm; SWUnits=Volumetric; OCUnits=Total; PHUnits=Water
              Thickness  NO3  NH4  SW
              150        1    0.1  0.267365
              150        1    0.1  0.267365
              300        1    0.1  0.364588
              300        1    0.1  0.401047
              300        1    0.1  0.267365
              300        1    0.1  0.267365
        RectangularZone 35m: Area=0.05; Slope=0; Length=100; Width=5
          LocalMicroClimate
          MicroClimate: same as Validation.WarraFallow.WindbreakSystem.TreeRow.MicroClimate
          Report
            VariableNames:
              [Clock].Today
              [Zone].Area
              Distance
              Radn
              [LocalMicroClimate].Radn
              [TreeProxy].Shade
          Report DailyReport: EventNames=[Clock].DoReport
            VariableNames:
              [Clock].Today
              Distance
              LocalMicroClimate.Wind
              sum([Soil].SoilWater.SWmm[1:4]) as WaterTo90
              sum([Soil].NO3N) as TotalNO3N
              sum([Soil].NH4N) as TotalNH4N
              [MicroClimate].peta
              [MicroClimate].petr
          Fertiliser
          SurfaceOrganicMatter: same as Small Windbreak Example.WindbreakSystem.TreeRow.SurfaceOrganicMatter
          Soil: ASCOrder=Vertosol; ASCSubOrder=Grey; SoilType=Clay; Site=Warra; NearestTown=Warra, Q, 4411; Region=Darling Downs and Granite Belt; State=Queensland; Country=Australia; NaturalVegetation=Brigalow scrub; ApsoilNumber=19; Latitude=-26.897; Longitude=150.909; LocationAccuracy=+/- 20m; DataSource=0; Comments=CSIRO Sustainable Ecosystems, Toowoomba
            Water
              Thickness  BD    AirDry  LL15  DUL   SAT
              150        1.39  0.105   0.22  0.4   0.45
              150        1.35  0.168   0.21  0.41  0.46
              300        1.35  0.22    0.22  0.41  0.46
              300        1.43  0.22    0.24  0.38  0.43
              300        1.44  0.22    0.26  0.38  0.43
              300        1.45  0.22    0.34  0.37  0.42
            SoilWater: same as Validation.WarraFallow.WindbreakSystem.TreeRow.Soil.SoilWater
            SoilNitrogen: fom_type=[default, manure, mucuna, lablab, shemp, stable]; fract_carb=[0.2, 0.3, 0.54, 0.57, 0.45, 0]; fract_cell=[0.7, 0.3, 0.37, 0.37, 0.47, 0.1]; fract_lign=[0.1, 0.4, 0.09, 0.06, 0.08, 0.9]; wfpsN2N2O_x=[22, 88]; wfpsN2N2O_y=[0.1, 1]
            SoilOrganicMatter: same as Validation.WarraFallow.WindbreakSystem.TreeRow.Soil.SoilOrganicMatter
            Analysis: Thickness=[150, 150, 300, 300, 300, 300]; PH=[8, 8, 8, 8, 8, 8]; PHUnits=Water; BoronUnits=HotWater
            Sample: NO3Units=ppm; NH4Units=ppm; SWUnits=Volumetric; OCUnits=Total; PHUnits=Water
              Thickness  NO3  NH4  SW
              150        1    0.1  0.267192
              150        1    0.1  0.267192
              300        1    0.1  0.364353
              300        1    0.1  0.400788
              300        1    0.1  0.267192
              300        1    0.1  0.267192
        RectangularZone 40m: Area=0.05; Slope=0; Length=100; Width=5
          LocalMicroClimate
          MicroClimate: same as Validation.WarraFallow.WindbreakSystem.TreeRow.MicroClimate
          Report
            VariableNames:
              [Clock].Today
              [Zone].Area
              Distance
              Radn
              [LocalMicroClimate].Radn
              [TreeProxy].Shade
          Report DailyReport: EventNames=[Clock].DoReport
            VariableNames:
              [Clock].Today
              Distance
              LocalMicroClimate.Wind
              sum([Soil].SoilWater.SWmm[1:4]) as WaterTo90
              sum([Soil].NO3N) as TotalNO3N
              sum([Soil].NH4N) as TotalNH4N
              [MicroClimate].peta
              [MicroClimate].petr
          Fertiliser
          SurfaceOrganicMatter: same as Small Windbreak Example.WindbreakSystem.TreeRow.SurfaceOrganicMatter
          Soil: ASCOrder=Vertosol; ASCSubOrder=Grey; SoilType=Clay; Site=Warra; NearestTown=Warra, Q, 4411; Region=Darling Downs and Granite Belt; State=Queensland; Country=Australia; NaturalVegetation=Brigalow scrub; ApsoilNumber=19; Latitude=-26.897; Longitude=150.909; LocationAccuracy=+/- 20m; DataSource=0; Comments=CSIRO Sustainable Ecosystems, Toowoomba
            Water
              Thickness  BD    AirDry  LL15  DUL   SAT
              150        1.39  0.105   0.22  0.4   0.45
              150        1.35  0.168   0.21  0.41  0.46
              300        1.35  0.22    0.22  0.41  0.46
              300        1.43  0.22    0.24  0.38  0.43
              300        1.44  0.22    0.26  0.38  0.43
              300        1.45  0.22    0.34  0.37  0.42
            SoilWater: same as Validation.WarraFallow.WindbreakSystem.TreeRow.Soil.SoilWater
            SoilNitrogen: fom_type=[default, manure, mucuna, lablab, shemp, stable]; fract_carb=[0.2, 0.3, 0.54, 0.57, 0.45, 0]; fract_cell=[0.7, 0.3, 0.37, 0.37, 0.47, 0.1]; fract_lign=[0.1, 0.4, 0.09, 0.06, 0.08, 0.9]; wfpsN2N2O_x=[22, 88]; wfpsN2N2O_y=[0.1, 1]
            SoilOrganicMatter: same as Validation.WarraFallow.WindbreakSystem.TreeRow.Soil.SoilOrganicMatter
            Analysis: Thickness=[150, 150, 300, 300, 300, 300]; PH=[8, 8, 8, 8, 8, 8]; PHUnits=Water; BoronUnits=HotWater
            Sample: NO3Units=ppm; NH4Units=ppm; SWUnits=Volumetric; OCUnits=Total; PHUnits=Water
              Thickness  NO3  NH4  SW
              150        1    0.1  0.274698
              150        1    0.1  0.274698
              300        1    0.1  0.374588
              300        1    0.1  0.412047
              300        1    0.1  0.274698
              300        1    0.1  0.274698
        RectangularZone 45m: Area=0.05; Slope=0; Length=100; Width=5
          LocalMicroClimate
          MicroClimate: same as Validation.WarraFallow.WindbreakSystem.TreeRow.MicroClimate
          Report
            VariableNames:
              [Clock].Today
              [Zone].Area
              Distance
              Radn
              [LocalMicroClimate].Radn
              [TreeProxy].Shade
          Report DailyReport: EventNames=[Clock].DoReport
            VariableNames:
              [Clock].Today
              Distance
              LocalMicroClimate.Wind
              sum([Soil].SoilWater.SWmm[1:4]) as WaterTo90
              sum([Soil].NO3N) as TotalNO3N
              sum([Soil].NH4N) as TotalNH4N
              [MicroClimate].peta
              [MicroClimate].petr
          Fertiliser
          SurfaceOrganicMatter: same as Small Windbreak Example.WindbreakSystem.TreeRow.SurfaceOrganicMatter
          Soil: ASCOrder=Vertosol; ASCSubOrder=Grey; SoilType=Clay; Site=Warra; NearestTown=Warra, Q, 4411; Region=Darling Downs and Granite Belt; State=Queensland; Country=Australia; NaturalVegetation=Brigalow scrub; ApsoilNumber=19; Latitude=-26.897; Longitude=150.909; LocationAccuracy=+/- 20m; DataSource=0; Comments=CSIRO Sustainable Ecosystems, Toowoomba
            Water
              Thickness  BD    AirDry  LL15  DUL   SAT
              150        1.39  0.105   0.22  0.4   0.45
              150        1.35  0.168   0.21  0.41  0.46
              300        1.35  0.22    0.22  0.41  0.46
              300        1.43  0.22    0.24  0.38  0.43
              300        1.44  0.22    0.26  0.38  0.43
              300        1.45  0.22    0.34  0.37  0.42
            SoilWater: same as Validation.WarraFallow.WindbreakSystem.TreeRow.Soil.SoilWater
            SoilNitrogen: fom_type=[default, manure, mucuna, lablab, shemp, stable]; fract_carb=[0.2, 0.3, 0.54, 0.57, 0.45, 0]; fract_cell=[0.7, 0.3, 0.37, 0.37, 0.47, 0.1]; fract_lign=[0.1, 0.4, 0.09, 0.06, 0.08, 0.9]; wfpsN2N2O_x=[22, 88]; wfpsN2N2O_y=[0.1, 1]
            SoilOrganicMatter: same as Validation.WarraFallow.WindbreakSystem.TreeRow.Soil.SoilOrganicMatter
            Analysis: Thickness=[150, 150, 300, 300, 300, 300]; PH=[8, 8, 8, 8, 8, 8]; PHUnits=Water; BoronUnits=HotWater
            Sample: NO3Units=ppm; NH4Units=ppm; SWUnits=Volumetric; OCUnits=Total; PHUnits=Water
              Thickness  NO3  NH4  SW
              150        1    0.1  0.269004
              150        1    0.1  0.269004
              300        1    0.1  0.366824
              300        1    0.1  0.403506
              300        1    0.1  0.269004
              300        1    0.1  0.269004
        RectangularZone 50m: Area=0.05; Slope=0; Length=100; Width=5
          LocalMicroClimate
          MicroClimate: same as Validation.WarraFallow.WindbreakSystem.TreeRow.MicroClimate
          Report
            VariableNames:
              [Clock].Today
              [Zone].Area
              Distance
              Radn
              [LocalMicroClimate].Radn
              [TreeProxy].Shade
          Report DailyReport: EventNames=[Clock].DoReport
            VariableNames:
              [Clock].Today
              Distance
              LocalMicroClimate.Wind
              sum([Soil].SoilWater.SWmm[1:4]) as WaterTo90
              sum([Soil].NO3N) as TotalNO3N
              sum([Soil].NH4N) as TotalNH4N
              [MicroClimate].peta
              [MicroClimate].petr
          Fertiliser
          SurfaceOrganicMatter: same as Small Windbreak Example.WindbreakSystem.TreeRow.SurfaceOrganicMatter
          Soil: ASCOrder=Vertosol; ASCSubOrder=Grey; SoilType=Clay; Site=Warra; NearestTown=Warra, Q, 4411; Region=Darling Downs and Granite Belt; State=Queensland; Country=Australia; NaturalVegetation=Brigalow scrub; ApsoilNumber=19; Latitude=-26.897; Longitude=150.909; LocationAccuracy=+/- 20m; DataSource=0; Comments=CSIRO Sustainable Ecosystems, Toowoomba
            Water
              Thickness  BD    AirDry  LL15  DUL   SAT
              150        1.39  0.105   0.22  0.4   0.45
              150        1.35  0.168   0.21  0.41  0.46
              300        1.35  0.22    0.22  0.41  0.46
              300        1.43  0.22    0.24  0.38  0.43
              300        1.44  0.22    0.26  0.38  0.43
              300        1.45  0.22    0.34  0.37  0.42
            SoilWater: same as Validation.WarraFallow.WindbreakSystem.TreeRow.Soil.SoilWater
            SoilNitrogen: fom_type=[default, manure, mucuna, lablab, shemp, stable]; fract_carb=[0.2, 0.3, 0.54, 0.57, 0.45, 0]; fract_cell=[0.7, 0.3, 0.37, 0.37, 0.47, 0.1]; fract_lign=[0.1, 0.4, 0.09, 0.06, 0.08, 0.9]; wfpsN2N2O_x=[22, 88]; wfpsN2N2O_y=[0.1, 1]
            SoilOrganicMatter: same as Validation.WarraFallow.WindbreakSystem.TreeRow.Soil.SoilOrganicMatter
            Analysis: Thickness=[150, 150, 300, 300, 300, 300]; PH=[8, 8, 8, 8, 8, 8]; PHUnits=Water; BoronUnits=HotWater
            Sample: NO3Units=ppm; NH4Units=ppm; SWUnits=Volumetric; OCUnits=Total; PHUnits=Water
              Thickness  NO3  NH4  SW
              150        1    0.1  0.270212
              150        1    0.1  0.270212
              300        1    0.1  0.368471
              300        1    0.1  0.405318
              300        1    0.1  0.270212
              300        1    0.1  0.270212
    Simulation WarraWheat: Area=0; Slope=0
      Clock: StartDate=2004-03-22; EndDate=2004-12-31
      Summary SummaryFile
      Weather: FileName=Validation\warra.met
      SoilArbitrator Soil Arbitrator
      ForestrySystem WindbreakSystem: Area=0.55; Slope=0
        TreeProxy: same as Validation.WarraFallow.WindbreakSystem.TreeProxy
        Manager SowingRule
          StartDate = 1-jun
          EndDate = 1-jun
          MinESW = 10
          ESWZoneName = 5m
          MinRain = 0
          RainDays = 7
          CultivarName = Hartog
          SowingDepth = 30
          RowSpacing = 250
          Population = 75
          Amount = 50
          CropName = wheat
          script: same as in Small Windbreak Example.WindbreakSystem.SowingRule
        RectangularZone TreeRow: same as Validation.WarraFallow.WindbreakSystem.TreeRow
        RectangularZone 5m: Area=0.05; Slope=0; Length=100; Width=5
          LocalMicroClimate
          MicroClimate: same as Validation.WarraFallow.WindbreakSystem.TreeRow.MicroClimate
          Report: EventNames=[Wheat].Harvesting
            VariableNames:
              [Clock].Today
              [Zone].Area
              Distance
              Radn
              [LocalMicroClimate].Radn
              [TreeProxy].Shade
              [Wheat].Grain.Yield
              [Wheat].AboveGround.Wt
          Report DailyReport: EventNames=[Clock].DoReport
            VariableNames:
              [Clock].Today
              Distance
              LocalMicroClimate.Wind
              sum([Soil].SoilWater.SWmm[1:4]) as WaterTo90
              sum([Soil].NO3N) as TotalNO3N
              sum([Soil].NH4N) as TotalNH4N
              [MicroClimate].peta
              [MicroClimate].petr
              [Wheat].Grain.Yield
              [Wheat].AboveGround.Wt
          Fertiliser
          SurfaceOrganicMatter: same as Small Windbreak Example.WindbreakSystem.TreeRow.SurfaceOrganicMatter
          Soil: ASCOrder=Vertosol; ASCSubOrder=Grey; SoilType=Clay; Site=Warra; NearestTown=Warra, Q, 4411; Region=Darling Downs and Granite Belt; State=Queensland; Country=Australia; NaturalVegetation=Brigalow scrub; ApsoilNumber=19; Latitude=-26.897; Longitude=150.909; LocationAccuracy=+/- 20m; DataSource=0; Comments=CSIRO Sustainable Ecosystems, Toowoomba
            Water
              Thickness  BD    AirDry  LL15  DUL   SAT
              150        1.39  0.105   0.22  0.4   0.45
              150        1.35  0.168   0.21  0.41  0.46
              300        1.35  0.22    0.22  0.41  0.46
              300        1.43  0.22    0.24  0.38  0.43
              300        1.44  0.22    0.26  0.38  0.43
              300        1.45  0.22    0.34  0.37  0.42
              SoilCrop WheatSoil: LL=[0.261, 0.248, 0.28, 0.306, 0.36, 0.392]; KL=[0.06, 0.06, 0.06, 0.04, 0.04, 0.02]; XF=[1, 1, 1, 1, 1, 1]
            SoilWater: same as Validation.WarraFallow.WindbreakSystem.TreeRow.Soil.SoilWater
            SoilNitrogen: fom_type=[default, manure, mucuna, lablab, shemp, stable]; fract_carb=[0.2, 0.3, 0.54, 0.57, 0.45, 0]; fract_cell=[0.7, 0.3, 0.37, 0.37, 0.47, 0.1]; fract_lign=[0.1, 0.4, 0.09, 0.06, 0.08, 0.9]; wfpsN2N2O_x=[22, 88]; wfpsN2N2O_y=[0.1, 1]
            SoilOrganicMatter: same as Validation.WarraFallow.WindbreakSystem.TreeRow.Soil.SoilOrganicMatter
            Analysis: Thickness=[150, 150, 300, 300, 300, 300]; PH=[8, 8, 8, 8, 8, 8]; PHUnits=Water; BoronUnits=HotWater
            Sample: NO3Units=ppm; NH4Units=ppm; SWUnits=Volumetric; OCUnits=Total; PHUnits=Water
              Thickness  NO3  NH4  SW
              150        1    0.1  0.19668
              150        1    0.1  0.19668
              300        1    0.1  0.2682
              300        1    0.1  0.29502
              300        1    0.1  0.3129
              300        1    0.1  0.33078
          Plant15 Wheat: AutoHarvest=true; CropType=Wheat
        RectangularZone 10m: Area=0.05; Slope=0; Length=100; Width=5
          LocalMicroClimate
          MicroClimate: same as Validation.WarraFallow.WindbreakSystem.TreeRow.MicroClimate
          Report: EventNames=[Wheat].Harvesting
            VariableNames:
              [Clock].Today
              Distance
              [Zone].Area
              Distance
              Radn
              [LocalMicroClimate].Radn
              [TreeProxy].Shade
              [Wheat].Grain.Yield
              [Wheat].AboveGround.Wt
          Report DailyReport: EventNames=[Clock].DoReport
            VariableNames:
              [Clock].Today
              Distance
              LocalMicroClimate.Wind
              sum([Soil].SoilWater.SWmm[1:4]) as WaterTo90
              sum([Soil].NO3N) as TotalNO3N
              sum([Soil].NH4N) as TotalNH4N
              [MicroClimate].peta
              [MicroClimate].petr
              [Wheat].Grain.Yield
              [Wheat].AboveGround.Wt
          Fertiliser
          SurfaceOrganicMatter: same as Small Windbreak Example.WindbreakSystem.TreeRow.SurfaceOrganicMatter
          Soil: ASCOrder=Vertosol; ASCSubOrder=Grey; SoilType=Clay; Site=Warra; NearestTown=Warra, Q, 4411; Region=Darling Downs and Granite Belt; State=Queensland; Country=Australia; NaturalVegetation=Brigalow scrub; ApsoilNumber=19; Latitude=-26.897; Longitude=150.909; LocationAccuracy=+/- 20m; DataSource=0; Comments=CSIRO Sustainable Ecosystems, Toowoomba
            Water: same as Validation.WarraWheat.WindbreakSystem.5m.Soil.Water
            SoilWater: same as Validation.WarraFallow.WindbreakSystem.TreeRow.Soil.SoilWater
            SoilNitrogen: fom_type=[default, manure, mucuna, lablab, shemp, stable]; fract_carb=[0.2, 0.3, 0.54, 0.57, 0.45, 0]; fract_cell=[0.7, 0.3, 0.37, 0.37, 0.47, 0.1]; fract_lign=[0.1, 0.4, 0.09, 0.06, 0.08, 0.9]; wfpsN2N2O_x=[22, 88]; wfpsN2N2O_y=[0.1, 1]
            SoilOrganicMatter: same as Validation.WarraFallow.WindbreakSystem.TreeRow.Soil.SoilOrganicMatter
            Analysis: Thickness=[150, 150, 300, 300, 300, 300]; PH=[8, 8, 8, 8, 8, 8]; PHUnits=Water; BoronUnits=HotWater
            Sample: same as Validation.WarraFallow.WindbreakSystem.10m.Soil.Sample
          Plant15 Wheat: AutoHarvest=true; CropType=Wheat
        RectangularZone 15m: Area=0.05; Slope=0; Length=100; Width=5
          LocalMicroClimate
          MicroClimate: same as Validation.WarraFallow.WindbreakSystem.TreeRow.MicroClimate
          Report: EventNames=[Wheat].Harvesting
            VariableNames:
              [Clock].Today
              [Zone].Area
              Distance
              Radn
              [LocalMicroClimate].Radn
              [TreeProxy].Shade
              [Wheat].Grain.Yield
              [Wheat].AboveGround.Wt
          Report DailyReport: EventNames=[Clock].DoReport
            VariableNames:
              [Clock].Today
              Distance
              LocalMicroClimate.Wind
              sum([Soil].SoilWater.SWmm[1:4]) as WaterTo90
              sum([Soil].NO3N) as TotalNO3N
              sum([Soil].NH4N) as TotalNH4N
              [MicroClimate].peta
              [MicroClimate].petr
              [Wheat].Grain.Yield
              [Wheat].AboveGround.Wt
          Fertiliser
          SurfaceOrganicMatter: same as Small Windbreak Example.WindbreakSystem.TreeRow.SurfaceOrganicMatter
          Soil: ASCOrder=Vertosol; ASCSubOrder=Grey; SoilType=Clay; Site=Warra; NearestTown=Warra, Q, 4411; Region=Darling Downs and Granite Belt; State=Queensland; Country=Australia; NaturalVegetation=Brigalow scrub; ApsoilNumber=19; Latitude=-26.897; Longitude=150.909; LocationAccuracy=+/- 20m; DataSource=0; Comments=CSIRO Sustainable Ecosystems, Toowoomba
            Water: same as Validation.WarraWheat.WindbreakSystem.5m.Soil.Water
            SoilWater: same as Validation.WarraFallow.WindbreakSystem.TreeRow.Soil.SoilWater
            SoilNitrogen: fom_type=[default, manure, mucuna, lablab, shemp, stable]; fract_carb=[0.2, 0.3, 0.54, 0.57, 0.45, 0]; fract_cell=[0.7, 0.3, 0.37, 0.37, 0.47, 0.1]; fract_lign=[0.1, 0.4, 0.09, 0.06, 0.08, 0.9]; wfpsN2N2O_x=[22, 88]; wfpsN2N2O_y=[0.1, 1]
            SoilOrganicMatter: same as Validation.WarraFallow.WindbreakSystem.TreeRow.Soil.SoilOrganicMatter
            Analysis: Thickness=[150, 150, 300, 300, 300, 300]; PH=[8, 8, 8, 8, 8, 8]; PHUnits=Water; BoronUnits=HotWater
            Sample: same as Validation.WarraFallow.WindbreakSystem.15m.Soil.Sample
          Plant15 Wheat: AutoHarvest=true; CropType=Wheat
        RectangularZone 20m: Area=0.05; Slope=0; Length=100; Width=5
          LocalMicroClimate
          MicroClimate: same as Validation.WarraFallow.WindbreakSystem.TreeRow.MicroClimate
          Report: EventNames=[Wheat].Harvesting
            VariableNames:
              [Clock].Today
              [Zone].Area
              Distance
              Radn
              [LocalMicroClimate].Radn
              [TreeProxy].Shade
              [Wheat].Grain.Yield
              [Wheat].AboveGround.Wt
          Report DailyReport: EventNames=[Clock].DoReport
            VariableNames:
              [Clock].Today
              Distance
              LocalMicroClimate.Wind
              sum([Soil].SoilWater.SWmm[1:4]) as WaterTo90
              sum([Soil].NO3N) as TotalNO3N
              sum([Soil].NH4N) as TotalNH4N
              [MicroClimate].peta
              [MicroClimate].petr
              [Wheat].Grain.Yield
              [Wheat].AboveGround.Wt
          Fertiliser
          SurfaceOrganicMatter: same as Small Windbreak Example.WindbreakSystem.TreeRow.SurfaceOrganicMatter
          Soil: ASCOrder=Vertosol; ASCSubOrder=Grey; SoilType=Clay; Site=Warra; NearestTown=Warra, Q, 4411; Region=Darling Downs and Granite Belt; State=Queensland; Country=Australia; NaturalVegetation=Brigalow scrub; ApsoilNumber=19; Latitude=-26.897; Longitude=150.909; LocationAccuracy=+/- 20m; DataSource=0; Comments=CSIRO Sustainable Ecosystems, Toowoomba
            Water: same as Validation.WarraWheat.WindbreakSystem.5m.Soil.Water
            SoilWater: same as Validation.WarraFallow.WindbreakSystem.TreeRow.Soil.SoilWater
            SoilNitrogen: fom_type=[default, manure, mucuna, lablab, shemp, stable]; fract_carb=[0.2, 0.3, 0.54, 0.57, 0.45, 0]; fract_cell=[0.7, 0.3, 0.37, 0.37, 0.47, 0.1]; fract_lign=[0.1, 0.4, 0.09, 0.06, 0.08, 0.9]; wfpsN2N2O_x=[22, 88]; wfpsN2N2O_y=[0.1, 1]
            SoilOrganicMatter: same as Validation.WarraFallow.WindbreakSystem.TreeRow.Soil.SoilOrganicMatter
            Analysis: Thickness=[150, 150, 300, 300, 300, 300]; PH=[8, 8, 8, 8, 8, 8]; PHUnits=Water; BoronUnits=HotWater
            Sample: same as Validation.WarraFallow.WindbreakSystem.20m.Soil.Sample
          Plant15 Wheat: AutoHarvest=true; CropType=Wheat
        RectangularZone 25m: Area=0.05; Slope=0; Length=100; Width=5
          LocalMicroClimate
          MicroClimate: same as Validation.WarraFallow.WindbreakSystem.TreeRow.MicroClimate
          Report: EventNames=[Wheat].Harvesting
            VariableNames:
              [Clock].Today
              [Zone].Area
              Distance
              Radn
              [LocalMicroClimate].Radn
              [TreeProxy].Shade
              [Wheat].Grain.Yield
              [Wheat].AboveGround.Wt
          Report DailyReport: EventNames=[Clock].DoReport
            VariableNames:
              [Clock].Today
              Distance
              LocalMicroClimate.Wind
              sum([Soil].SoilWater.SWmm[1:4]) as WaterTo90
              sum([Soil].NO3N) as TotalNO3N
              sum([Soil].NH4N) as TotalNH4N
              [MicroClimate].peta
              [MicroClimate].petr
              [Wheat].Grain.Yield
              [Wheat].AboveGround.Wt
          Fertiliser
          SurfaceOrganicMatter: same as Small Windbreak Example.WindbreakSystem.TreeRow.SurfaceOrganicMatter
          Soil: ASCOrder=Vertosol; ASCSubOrder=Grey; SoilType=Clay; Site=Warra; NearestTown=Warra, Q, 4411; Region=Darling Downs and Granite Belt; State=Queensland; Country=Australia; NaturalVegetation=Brigalow scrub; ApsoilNumber=19; Latitude=-26.897; Longitude=150.909; LocationAccuracy=+/- 20m; DataSource=0; Comments=CSIRO Sustainable Ecosystems, Toowoomba
            Water: same as Validation.WarraWheat.WindbreakSystem.5m.Soil.Water
            SoilWater: same as Validation.WarraFallow.WindbreakSystem.TreeRow.Soil.SoilWater
            SoilNitrogen: fom_type=[default, manure, mucuna, lablab, shemp, stable]; fract_carb=[0.2, 0.3, 0.54, 0.57, 0.45, 0]; fract_cell=[0.7, 0.3, 0.37, 0.37, 0.47, 0.1]; fract_lign=[0.1, 0.4, 0.09, 0.06, 0.08, 0.9]; wfpsN2N2O_x=[22, 88]; wfpsN2N2O_y=[0.1, 1]
            SoilOrganicMatter: same as Validation.WarraFallow.WindbreakSystem.TreeRow.Soil.SoilOrganicMatter
            Analysis: Thickness=[150, 150, 300, 300, 300, 300]; PH=[8, 8, 8, 8, 8, 8]; PHUnits=Water; BoronUnits=HotWater
            Sample: NO3Units=ppm; NH4Units=ppm; SWUnits=Volumetric; OCUnits=Total; PHUnits=Water
              Thickness  NO3  NH4  SW
              150        1    0.1  0.271333
              150        1    0.1  0.271333
              300        1    0.1  0.37
              300        1    0.1  0.407
              300        1    0.1  0.271333
              300        1    0.1  0.271333
          Plant15 Wheat: AutoHarvest=true; CropType=Wheat
        RectangularZone 30m: Area=0.05; Slope=0; Length=100; Width=5
          LocalMicroClimate
          MicroClimate: same as Validation.WarraFallow.WindbreakSystem.TreeRow.MicroClimate
          Report: EventNames=[Wheat].Harvesting
            VariableNames:
              [Clock].Today
              [Zone].Area
              Distance
              Radn
              [LocalMicroClimate].Radn
              [TreeProxy].Shade
              [Wheat].Grain.Yield
              [Wheat].AboveGround.Wt
          Report DailyReport: EventNames=[Clock].DoReport
            VariableNames:
              [Clock].Today
              Distance
              LocalMicroClimate.Wind
              sum([Soil].SoilWater.SWmm[1:4]) as WaterTo90
              sum([Soil].NO3N) as TotalNO3N
              sum([Soil].NH4N) as TotalNH4N
              [MicroClimate].peta
              [MicroClimate].petr
              [Wheat].Grain.Yield
              [Wheat].AboveGround.Wt
          Fertiliser
          SurfaceOrganicMatter: same as Small Windbreak Example.WindbreakSystem.TreeRow.SurfaceOrganicMatter
          Soil: ASCOrder=Vertosol; ASCSubOrder=Grey; SoilType=Clay; Site=Warra; NearestTown=Warra, Q, 4411; Region=Darling Downs and Granite Belt; State=Queensland; Country=Australia; NaturalVegetation=Brigalow scrub; ApsoilNumber=19; Latitude=-26.897; Longitude=150.909; LocationAccuracy=+/- 20m; DataSource=0; Comments=CSIRO Sustainable Ecosystems, Toowoomba
            Water: same as Validation.WarraWheat.WindbreakSystem.5m.Soil.Water
            SoilWater: same as Validation.WarraFallow.WindbreakSystem.TreeRow.Soil.SoilWater
            SoilNitrogen: fom_type=[default, manure, mucuna, lablab, shemp, stable]; fract_carb=[0.2, 0.3, 0.54, 0.57, 0.45, 0]; fract_cell=[0.7, 0.3, 0.37, 0.37, 0.47, 0.1]; fract_lign=[0.1, 0.4, 0.09, 0.06, 0.08, 0.9]; wfpsN2N2O_x=[22, 88]; wfpsN2N2O_y=[0.1, 1]
            SoilOrganicMatter: same as Validation.WarraFallow.WindbreakSystem.TreeRow.Soil.SoilOrganicMatter
            Analysis: Thickness=[150, 150, 300, 300, 300, 300]; PH=[8, 8, 8, 8, 8, 8]; PHUnits=Water; BoronUnits=HotWater
            Sample: same as Validation.WarraFallow.WindbreakSystem.30m.Soil.Sample
          Plant15 Wheat: AutoHarvest=true; CropType=Wheat
        RectangularZone 35m: Area=0.05; Slope=0; Length=100; Width=5
          LocalMicroClimate
          MicroClimate: same as Validation.WarraFallow.WindbreakSystem.TreeRow.MicroClimate
          Report: EventNames=[Wheat].Harvesting
            VariableNames:
              [Clock].Today
              [Zone].Area
              Distance
              Radn
              [LocalMicroClimate].Radn
              [TreeProxy].Shade
              [Wheat].Grain.Yield
              [Wheat].AboveGround.Wt
          Report DailyReport: EventNames=[Clock].DoReport
            VariableNames:
              [Clock].Today
              Distance
              LocalMicroClimate.Wind
              sum([Soil].SoilWater.SWmm[1:4]) as WaterTo90
              sum([Soil].NO3N) as TotalNO3N
              sum([Soil].NH4N) as TotalNH4N
              [MicroClimate].peta
              [MicroClimate].petr
              [Wheat].Grain.Yield
              [Wheat].AboveGround.Wt
          Fertiliser
          SurfaceOrganicMatter: same as Small Windbreak Example.WindbreakSystem.TreeRow.SurfaceOrganicMatter
          Soil: ASCOrder=Vertosol; ASCSubOrder=Grey; SoilType=Clay; Site=Warra; NearestTown=Warra, Q, 4411; Region=Darling Downs and Granite Belt; State=Queensland; Country=Australia; NaturalVegetation=Brigalow scrub; ApsoilNumber=19; Latitude=-26.897; Longitude=150.909; LocationAccuracy=+/- 20m; DataSource=0; Comments=CSIRO Sustainable Ecosystems, Toowoomba
            Water: same as Validation.WarraWheat.WindbreakSystem.5m.Soil.Water
            SoilWater: same as Validation.WarraFallow.WindbreakSystem.TreeRow.Soil.SoilWater
            SoilNitrogen: fom_type=[default, manure, mucuna, lablab, shemp, stable]; fract_carb=[0.2, 0.3, 0.54, 0.57, 0.45, 0]; fract_cell=[0.7, 0.3, 0.37, 0.37, 0.47, 0.1]; fract_lign=[0.1, 0.4, 0.09, 0.06, 0.08, 0.9]; wfpsN2N2O_x=[22, 88]; wfpsN2N2O_y=[0.1, 1]
            SoilOrganicMatter: same as Validation.WarraFallow.WindbreakSystem.TreeRow.Soil.SoilOrganicMatter
            Analysis: Thickness=[150, 150, 300, 300, 300, 300]; PH=[8, 8, 8, 8, 8, 8]; PHUnits=Water; BoronUnits=HotWater
            Sample: same as Validation.WarraFallow.WindbreakSystem.35m.Soil.Sample
          Plant15 Wheat: AutoHarvest=true; CropType=Wheat
        RectangularZone 40m: Area=0.05; Slope=0; Length=100; Width=5
          LocalMicroClimate
          MicroClimate: same as Validation.WarraFallow.WindbreakSystem.TreeRow.MicroClimate
          Report: EventNames=[Wheat].Harvesting
            VariableNames:
              [Clock].Today
              [Zone].Area
              Distance
              Radn
              [LocalMicroClimate].Radn
              [TreeProxy].Shade
              [Wheat].Grain.Yield
              [Wheat].AboveGround.Wt
          Report DailyReport: EventNames=[Clock].DoReport
            VariableNames:
              [Clock].Today
              Distance
              LocalMicroClimate.Wind
              sum([Soil].SoilWater.SWmm[1:4]) as WaterTo90
              sum([Soil].NO3N) as TotalNO3N
              sum([Soil].NH4N) as TotalNH4N
              [MicroClimate].peta
              [MicroClimate].petr
              [Wheat].Grain.Yield
              [Wheat].AboveGround.Wt
          Fertiliser
          SurfaceOrganicMatter: same as Small Windbreak Example.WindbreakSystem.TreeRow.SurfaceOrganicMatter
          Soil: ASCOrder=Vertosol; ASCSubOrder=Grey; SoilType=Clay; Site=Warra; NearestTown=Warra, Q, 4411; Region=Darling Downs and Granite Belt; State=Queensland; Country=Australia; NaturalVegetation=Brigalow scrub; ApsoilNumber=19; Latitude=-26.897; Longitude=150.909; LocationAccuracy=+/- 20m; DataSource=0; Comments=CSIRO Sustainable Ecosystems, Toowoomba
            Water: same as Validation.WarraWheat.WindbreakSystem.5m.Soil.Water
            SoilWater: same as Validation.WarraFallow.WindbreakSystem.TreeRow.Soil.SoilWater
            SoilNitrogen: fom_type=[default, manure, mucuna, lablab, shemp, stable]; fract_carb=[0.2, 0.3, 0.54, 0.57, 0.45, 0]; fract_cell=[0.7, 0.3, 0.37, 0.37, 0.47, 0.1]; fract_lign=[0.1, 0.4, 0.09, 0.06, 0.08, 0.9]; wfpsN2N2O_x=[22, 88]; wfpsN2N2O_y=[0.1, 1]
            SoilOrganicMatter: same as Validation.WarraFallow.WindbreakSystem.TreeRow.Soil.SoilOrganicMatter
            Analysis: Thickness=[150, 150, 300, 300, 300, 300]; PH=[8, 8, 8, 8, 8, 8]; PHUnits=Water; BoronUnits=HotWater
            Sample: same as Validation.WarraFallow.WindbreakSystem.40m.Soil.Sample
          Plant15 Wheat: AutoHarvest=true; CropType=Wheat
        RectangularZone 45m: Area=0.05; Slope=0; Length=100; Width=5
          LocalMicroClimate
          MicroClimate: same as Validation.WarraFallow.WindbreakSystem.TreeRow.MicroClimate
          Report: EventNames=[Wheat].Harvesting
            VariableNames:
              [Clock].Today
              [Zone].Area
              Distance
              Radn
              [LocalMicroClimate].Radn
              [TreeProxy].Shade
              [Wheat].Grain.Yield
              [Wheat].AboveGround.Wt
          Report DailyReport: EventNames=[Clock].DoReport
            VariableNames:
              [Clock].Today
              Distance
              LocalMicroClimate.Wind
              sum([Soil].SoilWater.SWmm[1:4]) as WaterTo90
              sum([Soil].NO3N) as TotalNO3N
              sum([Soil].NH4N) as TotalNH4N
              [MicroClimate].peta
              [MicroClimate].petr
              [Wheat].Grain.Yield
              [Wheat].AboveGround.Wt
          Fertiliser
          SurfaceOrganicMatter: same as Small Windbreak Example.WindbreakSystem.TreeRow.SurfaceOrganicMatter
          Soil: ASCOrder=Vertosol; ASCSubOrder=Grey; SoilType=Clay; Site=Warra; NearestTown=Warra, Q, 4411; Region=Darling Downs and Granite Belt; State=Queensland; Country=Australia; NaturalVegetation=Brigalow scrub; ApsoilNumber=19; Latitude=-26.897; Longitude=150.909; LocationAccuracy=+/- 20m; DataSource=0; Comments=CSIRO Sustainable Ecosystems, Toowoomba
            Water: same as Validation.WarraWheat.WindbreakSystem.5m.Soil.Water
            SoilWater: same as Validation.WarraFallow.WindbreakSystem.TreeRow.Soil.SoilWater
            SoilNitrogen: fom_type=[default, manure, mucuna, lablab, shemp, stable]; fract_carb=[0.2, 0.3, 0.54, 0.57, 0.45, 0]; fract_cell=[0.7, 0.3, 0.37, 0.37, 0.47, 0.1]; fract_lign=[0.1, 0.4, 0.09, 0.06, 0.08, 0.9]; wfpsN2N2O_x=[22, 88]; wfpsN2N2O_y=[0.1, 1]
            SoilOrganicMatter: same as Validation.WarraFallow.WindbreakSystem.TreeRow.Soil.SoilOrganicMatter
            Analysis: Thickness=[150, 150, 300, 300, 300, 300]; PH=[8, 8, 8, 8, 8, 8]; PHUnits=Water; BoronUnits=HotWater
            Sample: same as Validation.WarraFallow.WindbreakSystem.45m.Soil.Sample
          Plant15 Wheat: AutoHarvest=true; CropType=Wheat
        RectangularZone 50m: Area=0.05; Slope=0; Length=100; Width=5
          LocalMicroClimate
          MicroClimate: same as Validation.WarraFallow.WindbreakSystem.TreeRow.MicroClimate
          Report: EventNames=[Wheat].Harvesting
            VariableNames:
              [Clock].Today
              [Zone].Area
              Distance
              Radn
              [LocalMicroClimate].Radn
              [TreeProxy].Shade
              [Wheat].Grain.Yield
              [Wheat].AboveGround.Wt
          Report DailyReport: EventNames=[Clock].DoReport
            VariableNames:
              [Clock].Today
              Distance
              LocalMicroClimate.Wind
              sum([Soil].SoilWater.SWmm[1:4]) as WaterTo90
              sum([Soil].NO3N) as TotalNO3N
              sum([Soil].NH4N) as TotalNH4N
              [MicroClimate].peta
              [MicroClimate].petr
              [Wheat].Grain.Yield
              [Wheat].AboveGround.Wt
          Fertiliser
          SurfaceOrganicMatter: same as Small Windbreak Example.WindbreakSystem.TreeRow.SurfaceOrganicMatter
          Soil: ASCOrder=Vertosol; ASCSubOrder=Grey; SoilType=Clay; Site=Warra; NearestTown=Warra, Q, 4411; Region=Darling Downs and Granite Belt; State=Queensland; Country=Australia; NaturalVegetation=Brigalow scrub; ApsoilNumber=19; Latitude=-26.897; Longitude=150.909; LocationAccuracy=+/- 20m; DataSource=0; Comments=CSIRO Sustainable Ecosystems, Toowoomba
            Water: same as Validation.WarraWheat.WindbreakSystem.5m.Soil.Water
            SoilWater: same as Validation.WarraFallow.WindbreakSystem.TreeRow.Soil.SoilWater
            SoilNitrogen: fom_type=[default, manure, mucuna, lablab, shemp, stable]; fract_carb=[0.2, 0.3, 0.54, 0.57, 0.45, 0]; fract_cell=[0.7, 0.3, 0.37, 0.37, 0.47, 0.1]; fract_lign=[0.1, 0.4, 0.09, 0.06, 0.08, 0.9]; wfpsN2N2O_x=[22, 88]; wfpsN2N2O_y=[0.1, 1]
            SoilOrganicMatter: same as Validation.WarraFallow.WindbreakSystem.TreeRow.Soil.SoilOrganicMatter
            Analysis: Thickness=[150, 150, 300, 300, 300, 300]; PH=[8, 8, 8, 8, 8, 8]; PHUnits=Water; BoronUnits=HotWater
            Sample: same as Validation.WarraFallow.WindbreakSystem.50m.Soil.Sample
          Plant15 Wheat: AutoHarvest=true; CropType=Wheat
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