Simulations: Version=2
  Memo TitlePage
    #The APSIM AgroforestrySystem Model#
    *Huth, N.I., Fainges, J.L., Smethurst, P. and Masikati, P.*

    The APSIM Agroforestry model has been developed to facilitate the modelling of tree-crop and silvopastoral systems.  It has been tested on a range of datasets from constrasting agorforestry systems, soils and climates.  It makes use of APSIM's ability to simulate multiple zones within a production system [holzworth_apsim_2014] for simulating soil and plant processes at different locations within a windbreak, isolated tree or alley system.

    The role of this model is not to simulate tree production, but to simulate crop or pasture production in agroforestry systems by calculating tree-crop interactions via microclimate and soil effects.

    The proxy tree component of this model is intended also to be a guide for developing active trees for use in this model, as such trees would need to interact similarly with the crop or pasture component of the system.
  Replacements
    Soil MachakosSoil: Site=ICRAF Machakos Research Station; NearestTown=Machakos; Country=Kenya; Latitude=-1.55; Longitude=37.13
      Water
        Thickness  BD    AirDry  LL15  DUL   SAT
        200        1.35  0.04    0.1   0.2   0.35
        200        1.35  0.04    0.1   0.2   0.35
        200        1.35  0.14    0.14  0.22  0.37
        200        1.4   0.15    0.17  0.24  0.37
        200        1.4   0.16    0.17  0.24  0.38
        200        1.4   0.16    0.17  0.24  0.38
        200        1.4   0.16    0.17  0.24  0.38
        200        1.4   0.16    0.17  0.24  0.38
        SoilCrop MaizeSoil: LL=[0.1, 0.1, 0.14, 0.17, 0.17, 0.17, 0.17, 0.17]; KL=[0.08, 0.08, 0.08, 0.08, 0.06, 0.04, 0.03, 0.02]; XF=[1, 1, 1, 1, 1, 1, 1, 1]
      SoilWater: residueinterception=0; SummerDate=1-Nov; SummerU=9; SummerCona=2.5; WinterDate=1-Apr; WinterU=9; WinterCona=2.5; DiffusConst=88; DiffusSlope=35.4; Salb=0.13; CN2Bare=65; CNRed=20; CNCov=0.8; max_pond=0; Thickness=[200, 1400]; SWCON=[0.7, 0.7]
      SoilNitrogen: fom_type=[default, manure, mucuna, lablab, shemp, stable]; fract_carb=[0.2, 0.3, 0.54, 0.57, 0.45, 0]; fract_cell=[0.7, 0.3, 0.37, 0.37, 0.47, 0.1]; fract_lign=[0.1, 0.4, 0.09, 0.06, 0.08, 0.9]; wfpsN2N2O_x=[22, 88]; wfpsN2N2O_y=[0.1, 1]
      SoilOrganicMatter: RootCN=45; RootWt=500; SoilCN=12; EnrACoeff=7.4; EnrBCoeff=0.2; OCUnits=Total
        Thickness  OC   FBiom  FInert
        200        1.1  0.04   0.4
        200        0.8  0.02   0.5
        200        0.6  0.01   0.8
        200        0.6  0.01   0.9
        200        0.2  0.01   0.95
        200        0.1  0.01   0.95
        200        0.1  0.01   0.99
        200        0.1  0.01   0.99
      Analysis: Thickness=[200, 200, 200, 200, 200, 200, 200, 200]; PH=[6.5, 6.5, 6.5, 6.5, 6.5, 6.5, 6.5, 6.5]; PHUnits=Water; BoronUnits=HotWater
      Sample: NO3Units=ppm; NH4Units=ppm; SWUnits=Volumetric; OCUnits=Total; PHUnits=Water
        Thickness  NO3  NH4  SW
        200        5    0.1  0.13
        200        3    0.1  0.13
        200        2    0.1  0.16
        200        1    0.1  0.176
        200        0.5  0.1  0.17
        200        0.5  0.1  0.17
        200        0.5  0.1  0.17
        200        0.5  0.1  0.17
    Plant Maize: CropType=Maize
      OrganArbitrator Arbitrator: NArbitrationOption=PriorityThenRelativeAllocation; DMArbitrationOption=RelativeAllocation
      Phenology
        AirTemperatureFunction ThermalTime
          XYPairs: X=[0, 18, 26, 34, 44]; Y=[0, 10, 18, 26, 0]
        GerminatingPhase Germinating: Start=Sowing; End=Germination
        EmergingPhase Emerging: Start=Germination; End=Emergence; ShootLag=55; ShootRate=0.6
          VariableReference ThermalTime: VariableName=[Phenology].ThermalTime.Value
        GenericPhase Juvenile: Start=Emergence; End=End_Juvenile
          Constant Target: Value=200
          VariableReference ThermalTime: VariableName=[Phenology].ThermalTime.Value
        GenericPhase Photosensitive: Start=End_Juvenile; End=Floral_Initiation
          VariableReference ThermalTime: VariableName=[Phenology].ThermalTime.Value
          LinearInterpolationFunction Target: XProperty=[Phenology].Photoperiod.Value
            Memo
              The photoperiod is likely to vary with individual maize cultivars.  Therefore, the response shown here is indicative only.  See the descriptions of individual cultivars for more detail on photoperiod responses used by the maize model.
            XYPairs: X=[0, 12.5, 24]; Y=[0, 0, 10]
        LeafAppearancePhase LeafAppearance: Start=Floral_Initiation; End=Flag_Leaf
          VariableReference ThermalTime: VariableName=[Phenology].ThermalTime.Value
        GenericPhase FlagLeafToFlowering: Start=Flag_Leaf; End=Flowering
          Constant Target: Value=50
          VariableReference ThermalTime: VariableName=[Phenology].ThermalTime.Value
        GenericPhase FloweringToGrainFilling: Start=Flowering; End=StartGrainFill
          Constant Target: Value=120
          VariableReference ThermalTime: VariableName=[Phenology].ThermalTime.Value
        GenericPhase GrainFilling: Start=StartGrainFill; End=EndGrainFill
          Constant Target: Value=550
          VariableReference ThermalTime: VariableName=[Phenology].ThermalTime.Value
        GenericPhase Maturing: Start=EndGrainFill; End=Maturity
          Constant Target: Value=10
          VariableReference ThermalTime: VariableName=[Phenology].ThermalTime.Value
        GenericPhase MaturityToHarvestRipe: Start=Maturity; End=HarvestRipe
          Constant Target: Value=10
          VariableReference ThermalTime: VariableName=[Phenology].ThermalTime.Value
        EndPhase ReadyForHarvesting: Start=HarvestRipe; End=Unused
          VariableReference ThermalTime: VariableName=[Phenology].ThermalTime.Value
        PhotoperiodFunction Photoperiod: Twilight=-6
        OnEventFunction FloweringDAS: SetEvent=Flowering; ReSetEvent=never
          Memo
            A function is used to provide flowering date as days after sowing(DAS).
          Constant PreEventValue: Value=0
          VariableReference PostEventValue: VariableName=[Phenology].DaysAfterSowing
        OnEventFunction MaturityDAS: SetEvent=Maturity; ReSetEvent=never
          Memo
            A function is used to provide maturity date as days after sowing(DAS).
          Constant PreEventValue: Value=0
          VariableReference PostEventValue: VariableName=[Phenology].DaysAfterSowing
      Structure: InitialiseStage=Emergence; PrimaryBudNo=1
        Memo
          Though tillering is common in some maize varieties under certain agronomic conditions, no tillering is accounted for within this model.  Therefore all branching has been parameterised out of the current maize model.
        VariableReference ThermalTime: VariableName=[Phenology].ThermalTime.Value
        PhaseLookup MainStemPrimordiaInitiationRate
          PhaseLookupValue Plastochron: Start=Emergence; End=Floral_Initiation
            MultiplyFunction Plastochron
              VariableReference Phyllochron: VariableName=[Structure].MainStemNodeAppearanceRate.Value
              Constant LeafTipsPerPrimordia: Value=0.5
        PhaseLookup MainStemNodeAppearanceRate
          PhaseLookupValue Phyllochron: Start=Emergence; End=Flag_Leaf
            LinearInterpolationFunction Phyllochron: XProperty=[Structure].MainStemNodeNo
              XYPairs: X=[1, 3.4, 4]; Y=[30, 30, 42]
        MainStemFinalNodeNumberFunction MainStemFinalNodeNumber: MaximumMainStemNodeNumber=30
          OnEventFunction FinalLeafNumber: SetEvent=Floral_Initiation
            AddFunction PreEventValue
              Constant PrimordiaAtEmergence: Value=6
              DivideFunction PrimordiaDuringJuvenilePhase
                VariableReference JuvenilePhaseDuration: VariableName=[Phenology].Juvenile.Target.Value
                Constant ApproximatePlastochron: Value=15
            VariableReference PostEventValue: VariableName=[Structure].MainStemPrimordiaNo
        HeightFunction HeightModel
          LinearInterpolationFunction PotentialHeight: XProperty=[Phenology].Stage
            XYPairs: X=[3, 4, 5, 6]; Y=[20, 50, 60, 1700]
          LinearInterpolationFunction WaterStress: XProperty=[Maize].WaterSupplyDemandRatio
            XYPairs: X=[0.3, 1]; Y=[1, 1]
        Constant BranchingRate: Value=0
        Constant ShadeInducedBranchMortality: Value=0
        Constant DroughtInducedBranchMortality: Value=0
      ReproductiveOrgan Grain: FractionRemoved=0; FractionToResidue=0
        Constant InitialGrainProportion: Value=0.05
        Constant MaximumPotentialGrainSize: Value=0.3
        PhaseLookup DMDemandFunction
          PhaseLookupValue InitialPhase: Start=Flowering; End=StartGrainFill
            FillingRateFunction
              VariableReference GrainNumber: VariableName=[Grain].NumberFunction.Value
              VariableReference FillingDuration: VariableName=[Phenology].FloweringToGrainFilling.Target.Value
              VariableReference ThermalTime: VariableName=[Phenology].ThermalTime.Value
              MultiplyFunction PotentialSizeIncrement
                VariableReference InitialProportion: VariableName=[Grain].InitialGrainProportion.Value
                VariableReference MaximumSize: VariableName=[Grain].MaximumPotentialGrainSize.Value
          PhaseLookupValue LinearPhase: Start=StartGrainFill; End=EndGrainFill
            FillingRateFunction
              VariableReference GrainNumber: VariableName=[Grain].NumberFunction.Value
              VariableReference FillingDuration: VariableName=[Phenology].GrainFilling.Target.Value
              VariableReference ThermalTime: VariableName=[Phenology].ThermalTime.Value
              MultiplyFunction PotentialSizeIncrement
                SubtractFunction ProportionLinearPhase
                  Constant One: Value=1
                  VariableReference InitialProportion: VariableName=[Grain].InitialGrainProportion.Value
                VariableReference MaximumSize: VariableName=[Grain].MaximumPotentialGrainSize.Value
        Biomass Live
        Biomass Dead
        Constant MinimumNConc: Value=0.008
        PhaseLookup MaximumNConc
          PhaseLookupValue InitialPhase: Start=Flowering; End=StartGrainFill
            Constant InitialNconc: Value=0.05
          PhaseLookupValue LinearPhase: Start=StartGrainFill; End=EndGrainFill
            Constant FinalNconc: Value=0.013
        Constant WaterContent: Value=0.12
        PhaseLookup NFillingRate
          PhaseLookupValue GrainFilling: Start=Flowering; End=EndGrainFill
            FillingRateFunction
              VariableReference GrainNumber: VariableName=[Grain].NumberFunction.Value
              AddFunction FillingDuration
                VariableReference FloweringToGrainFilling: VariableName=[Phenology].FloweringToGrainFilling.Target.Value
                VariableReference GrainFilling: VariableName=[Phenology].GrainFilling.Target.Value
              VariableReference ThermalTime: VariableName=[Phenology].ThermalTime.Value
              MultiplyFunction PotentialSizeIncrement
                Constant MaximumFinalNConc: Value=0.013
                VariableReference MaximumSize: VariableName=[Grain].MaximumPotentialGrainSize.Value
        MultiplyFunction NumberFunction
          VariableReference CobNumber: VariableName=[Rachis].CobNumber.Value
          LinearInterpolationFunction KernalsPerCob: XProperty=[Rachis].CobSize.Value
            Memo
              The number of kernals per cob is likely to vary with individual maize cultivars.  Therefore, the relationship shown here is indicative only.  See the descriptions of individual cultivars for more detail on kernal number determination used by the maize model.
            XYPairs: X=[0, 25]; Y=[0, 550]
          Constant GrainsPerKernal: Value=1
        ExpressionFunction YieldBuPerAcre: Expression=[Grain].Live.Wt * 10 * 56 * 0.4536 * 2.471
      Root: FractionRemoved=0; FractionToResidue=0; InitialDM=0.2; SpecificRootLength=40000; KNO3_yProperty=[0, 0.03]; KNO3_xRootLength=[0, 0.003]; KNH4_yProperty=[0, 0.0003]; KNH4_xRootLength=[0, 0.003]; NuptakeSupply=0
        CompositeBiomass Live: Propertys=[[Root].LayerLive]
        CompositeBiomass Dead: Propertys=[[Root].LayerDead]
        LinearInterpolationFunction KLModifier: XProperty=[Maize].Population
          Memo
            The parameter KL is is described by Meinke et al (1993) to combine elements of soil conductivity (K) with root length (L) in determining root water uptake.  Peake et al (2013) demonstrated that in maize KL varied with plant population through impacts on root length density.  Here we adjust KL linearly with plant population.
          XYPairs: X=[0, 10]; Y=[1, 1]
        Constant SoilWaterEffect: Value=1
          Memo
            No effect of soil water content on root growth is currently captured in the model.
        Constant TemperatureEffect: Value=1
          Memo
            No effect of temperature on root growth is currently captured in the model.
        Constant MaxDailyNUptake: Value=20
          Memo
            Maximum daily N uptake is set to an arbitrarily high value.
        Constant SenescenceRate: Value=0.005
          Memo
            Jones and Kiniry (1986) used a constant root senescence fraction in the CERES-Maize model.
        Constant StructuralFraction: Value=1
        Constant MaximumNConc: Value=0.01
        Constant MinimumNConc: Value=0.01
        LinearInterpolationFunction PartitionFraction: XProperty=[Phenology].Stage
          XYPairs: X=[0, 2.99, 3, 6, 7]; Y=[0, 0, 0.2, 0.2, 0]
        PhaseLookup RootFrontVelocity
          Memo
            Hammer et al (2009) used a constant extraction front velocity of 2.5cm per day in their analysis of historical maize yield trends in the US corn belt.
          PhaseLookupValue PreFlowering: Start=Germination; End=Flowering
            Constant RootFrontVelocity: Value=25
          PhaseLookupValue PostFlowering: Start=Flowering; End=Maturity
            Constant RootFrontVelocity: Value=0
        PhaseBasedSwitch NitrogenDemandSwitch: Start=Germination; End=Maturity
      Leaf: MaxCover=1; R50=200; KDead=0.03
        zero: FractionRemoved, FractionToResidue, CurrentExpandingLeaf, StartFractionExpanded, FractionNextleafExpanded, _ExpandedNodeNo, DeadNodesYesterday, Albedo, Gsmax, FRGR, PotentialEP, FractionDied
        LeafCohort InitialLeaves[1]: Rank=1; Area=380
        LeafCohort InitialLeaves[2]: Rank=2; Area=0
        LeafCohort InitialLeaves[3]: Rank=3; Area=0
        LeafCohort InitialLeaves[4]: Rank=4; Area=0
        LeafCohort InitialLeaves[5]: Rank=5; Area=0
        LeafCohort InitialLeaves[6]: Rank=6; Area=0
        CompositeBiomass Live: Propertys=[[Leaf].CohortLive]
        CompositeBiomass Dead: Propertys=[[Leaf].CohortDead]
        ArrayBiomass CohortArrayLive: Propertys=[[Leaf].Live]; ArraySize=[Leaf].MaxNodeNo
        ArrayBiomass CohortArrayDead: Propertys=[[Leaf].Dead]; ArraySize=[Leaf].MaxNodeNo
        LeafCohortParameters CohortParameters
          BellCurveFunction MaxArea
            Memo
              Potential leaf area is calculated from leaf number using the approach of Keating and Wafula (1992).
              Individual leaf size is described using a bell-shaped curve, the parameters of which are derived from final leaf number.
            MultiplyFunction LargestLeafPosition
              VariableReference FinalLeafNumber: VariableName=[Structure].MainStemFinalNodeNumber.Value
              Constant RelativePositionOfLargestLeaf: Value=0.67
            LinearInterpolationFunction AreaMax: XProperty=[Structure].MainStemFinalNodeNumber.Value
              XYPairs: X=[1, 5, 10, 15, 20, 25]; Y=[32530, 39259, 49659, 60000, 75000, 90000]
            LinearInterpolationFunction Breadth: XProperty=[Structure].MainStemFinalNodeNumber.Value
              XYPairs: X=[5, 10, 15, 20, 25]; Y=[-0.377, -0.144, -0.059, -0.027, -0.016]
            Constant Skewness: Value=0.00025
          Constant NReallocationFactor: Value=0.1
          Constant NRetranslocationFactor: Value=0.03
          Constant DMRetranslocationFactor: Value=0.5
          LinearInterpolationFunction CellDivisionStress: XProperty=[Maize].WaterSupplyDemandRatio
            XYPairs: X=[0.9, 1]; Y=[1, 1]
          LinearInterpolationFunction ExpansionStress: XProperty=[Maize].WaterSupplyDemandRatio
            XYPairs: X=[0.3, 1]; Y=[0.1, 1]
          LinearInterpolationFunction GrowthDuration: XProperty=[Structure].RelativeNodeApperance
            XYPairs: X=[0, 0.3, 0.5, 1]; Y=[0, 200, 250, 100]
          LinearInterpolationFunction LagDuration: XProperty=[Structure].RelativeNodeApperance
            XYPairs: X=[0, 0.5, 1]; Y=[350, 650, 600]
          LinearInterpolationFunction SenescenceDuration: XProperty=[Structure].RelativeNodeApperance
            XYPairs: X=[0, 11, 20]; Y=[359, 350, 350]
          Constant DetachmentLagDuration: Value=1000000
          Constant DetachmentDuration: Value=1000000
          LinearInterpolationFunction MaximumNConc: XProperty=[Structure].MainStemNodeNo
            XYPairs: X=[1, 10]; Y=[0.04, 0.02]
          Constant CriticalNConc: Value=0.015
          Constant MinimumNConc: Value=0.008
          AddFunction DroughtInducedSenAcceleration
            Constant One: Value=1
            MultiplyFunction Stress
              Constant StressResponseCoefficient: Value=1
              LinearInterpolationFunction StressFactor: XProperty=[Maize].WaterSupplyDemandRatio
                XYPairs: X=[0, 0.7]; Y=[0, 0]
          LinearInterpolationFunction SpecificLeafAreaMax: XProperty=[Structure].MainStemNodeNo
            XYPairs: X=[1, 9]; Y=[50000, 25000]
          LinearInterpolationFunction SpecificLeafAreaMin: XProperty=[Structure].MainStemNodeNo
            XYPairs: X=[1, 9]; Y=[8000, 8000]
          Constant StructuralFraction: Value=0.7
          Constant NonStructuralFraction: Value=0
          LinearInterpolationFunction ShadeInducedSenescenceRate: XProperty=[Leaf].CohortCurrentRankCoverAbove
            XYPairs: X=[0, 0.7, 0.8, 0.96, 0.99]; Y=[0, 0, 0, 0, 0]
          Constant InitialNConc: Value=0
        RUEModel Photosynthesis
          Constant RUE: Value=1.75
          WeightedTemperatureFunction FT: MaximumTemperatureWeighting=0.75
            XYPairs: X=[0, 8, 15, 35, 50]; Y=[0, 0, 1, 1, 0]
          LinearInterpolationFunction FVPD: XProperty=[Leaf].Photosynthesis.VPD
            XYPairs: X=[0, 10, 50]; Y=[1, 1, 1]
          LinearInterpolationFunction FN: XProperty=[Leaf].Fn
            XYPairs: X=[0, 1]; Y=[0.3, 1]
          LinearInterpolationFunction FW: XProperty=[Leaf].Fw
            XYPairs: X=[0, 0.3]; Y=[0, 1]
          RUECO2Function FCO2: PhotosyntheticPathway=C4
          VariableReference RadnInt: VariableName=[Leaf].RadIntTot
        MultiplyFunction ExtinctionCoeff
          Memo
            Extinction coefficient is specified in terms of a potential extinction coefficient which is then discounted during periods of water stress to account for the impact of leaf curling.
          LinearInterpolationFunction PotentialExtinctionCoeff: XProperty=[Leaf].LAI
            XYPairs: X=[0, 0.45]; Y=[0.65, 0.65]
          LinearInterpolationFunction WaterStressImpact: XProperty=[Maize].WaterSupplyDemandRatio
            XYPairs: X=[0, 0.7]; Y=[0.5, 1]
        LinearInterpolationFunction FrostFraction: XProperty=[Weather].MinT
          XYPairs: X=[-10, -9]; Y=[1, 0]
        VariableReference ThermalTime: VariableName=[Phenology].ThermalTime.Value
        MinimumFunction FRGRFunction
          VariableReference RUE_FT: VariableName=[Leaf].Photosynthesis.FT.Value
          MinimumFunction Others
            VariableReference RUE_FN: VariableName=[Leaf].Photosynthesis.FN.Value
            VariableReference RUE_FVPD: VariableName=[Leaf].Photosynthesis.FVPD.Value
      GenericAboveGroundOrgan Husk: FractionRemoved=0; FractionToResidue=0
        PopulationBasedDemandFunction DMDemandFunction
          VariableReference ThermalTime: VariableName=[Phenology].ThermalTime.Value
          Constant ExpansionStress: Value=1
          Constant StartStage: Value=5.2
          Constant GrowthDuration: Value=120
          Constant MaximumOrganWt: Value=25
          VariableReference OrganPopulation: VariableName=[Rachis].CobNumber.Value
        Biomass Live
        Biomass Dead
        Constant NReallocationFactor: Value=0
        Constant NRetranslocationFactor: Value=0.1
        Constant MaximumNConc: Value=0.01
        Constant StructuralFraction: Value=0.2
        Constant MinimumNConc: Value=0.01
      GenericAboveGroundOrgan Rachis: FractionRemoved=0; FractionToResidue=0
        MultiplyFunction CobNumber
          VariableReference StemNumber: VariableName=[Structure].TotalStemPopn
          Constant CobsPerStem: Value=1.1
        DivideFunction CobSize
          VariableReference CobMass: VariableName=[Rachis].Live.Wt
          VariableReference CobNumber: VariableName=[Rachis].CobNumber.Value
        PopulationBasedDemandFunction DMDemandFunction
          VariableReference ThermalTime: VariableName=[Phenology].ThermalTime.Value
          Constant ExpansionStress: Value=1
          Constant StartStage: Value=5.5
          Constant GrowthDuration: Value=300
          Constant MaximumOrganWt: Value=25
          VariableReference OrganPopulation: VariableName=[Rachis].CobNumber.Value
        Biomass Live
        Biomass Dead
        Constant NReallocationFactor: Value=0
        Constant NRetranslocationFactor: Value=0.1
        Constant MaximumNConc: Value=0.008
        Constant StructuralFraction: Value=1
        Constant MinimumNConc: Value=0.003
        LinearInterpolationFunction ExpansionStress: XProperty=[Maize].WaterSupplyDemandRatio
          XYPairs: X=[0, 0.6]; Y=[1, 1]
      GenericAboveGroundOrgan Stem: FractionRemoved=0; FractionToResidue=0
        Biomass Live
        Biomass Dead
        Constant StructuralFraction: Value=0.8
        LinearInterpolationFunction MaximumNConc: XProperty=[Structure].MainStemNodeNo
          XYPairs: X=[1, 10, 11]; Y=[0.03, 0.03, 0.005]
        Constant MinimumNConc: Value=0.006
        PhaseBasedSwitch NitrogenDemandSwitch: Start=Emergence; End=StartGrainFill
        Constant NReallocationFactor: Value=0
        Constant NRetranslocationFactor: Value=0.5
        Constant DMRetranslocationFactor: Value=0.5
        MinimumFunction DMDemandFunction
          MultiplyFunction PotentialDMAccumulation
            VariableReference NodesAppearing: VariableName=[Structure].DeltaNodeNumber
            VariableReference Branches: VariableName=[Structure].TotalStemPopn
            LinearInterpolationFunction PotentialInternodeWt: XProperty=[Structure].RelativeNodeApperance
              XYPairs: X=[0, 0.5, 1]; Y=[0, 0.2, 16]
          MultiplyFunction HightLimitedDMAccumulation
            Constant SpecificStemLengthMax: Value=500
            VariableReference Branches: VariableName=[Structure].TotalStemPopn
            VariableReference DeltaHeight: VariableName=[Structure].HeightModel.DeltaHeight
      CompositeBiomass AboveGround
        Propertys=[[Leaf].Live, [Leaf].Dead, [Stem].Live, [Stem].Dead, [Husk].Live, [Husk].Dead, [Grain].Live, [Grain].Dead, [Rachis].Live, [Rachis].Dead]
        Memo
          The AboveGround composite biomass object includes all organs occurring above the soil surface to allow output for total dry matter and Nutrient contents, including total structural, non-structural and metabolic pools.
      CompositeBiomass BelowGround: Propertys=[[Root].Live, [Root].Dead]
        Memo
          The BelowGround composite biomass object includes all root biomass pools to allow output for total dry matter and Nutrient contents, including total structural, non-structural and metabolic pools.
      CompositeBiomass Total
        Propertys=[[Leaf].Live, [Leaf].Dead, [Stem].Live, [Stem].Dead, [Husk].Live, [Husk].Dead, [Grain].Live, [Grain].Dead, [Rachis].Live, [Rachis].Dead, [Root].Live, [Root].Dead]
        Memo
          The Total composite biomass object includes all organs (above+below ground) to allow output for total dry matter and Nutrient contents, including total structural, non-structural and metabolic pools.
      CompositeBiomass TotalLive
        Propertys=[[Leaf].Live, [Stem].Live, [Husk].Live, [Grain].Live, [Rachis].Live, [Root].Live]
        Memo
          The TotalLive composite biomass object includes the Live pools of all organs (above+below ground) to allow output for total dry matter and Nutrient contents, including total structural, non-structural and metabolic pools.
      CompositeBiomass TotalDead
        Propertys=[[Leaf].Dead, [Stem].Dead, [Husk].Dead, [Grain].Dead, [Rachis].Dead, [Root].Dead]
        Memo
          The TotalDead composite biomass object includes the Dead pools of all organs (above+below ground) to allow output for total dry matter and Nutrient contents, including total structural, non-structural and metabolic pools.
      CompositeBiomass EarLive: Propertys=[[Husk].Live, [Grain].Live, [Rachis].Live]
        Memo
          The EarLive composite biomass object includes the Live pools of all organs within the Ear to allow output for total dry matter and Nutrient contents, including total structural, non-structural and metabolic pools.
      CompositeBiomass AboveGroundLive
        Propertys=[[Leaf].Live, [Stem].Live, [Husk].Live, [Grain].Live, [Rachis].Live]
        Memo
          The AboveGroundLive composite biomass object includes the Live pools of all organs occurring above the soil surface to allow output for total dry matter and Nutrient contents, including total structural, non-structural and metabolic pools.
      CompositeBiomass AboveGroundDead
        Propertys=[[Leaf].Dead, [Stem].Dead, [Husk].Dead, [Grain].Dead, [Rachis].Dead]
        Memo
          The AboveGroundDead composite biomass object includes the Dead pools of all organs occurring above the soil surface to allow output for total dry matter and Nutrient contents, including total structural, non-structural and metabolic pools.
      Cultivar Pioneer_39G12: Command=[Phenology].GrainFilling.Target.Value = 550
      Cultivar Pioneer_3153
      Cultivar Katumani
        Command:
          [Phenology].Juvenile.Target.Value = 150
          [Phenology].Photosensitive.Target.XYPairs.X = 0, 12.5, 24
          [Phenology].Photosensitive.Target.XYPairs.Y = 0, 0, 115
          [Phenology].FlagLeafToFlowering.Target.Value = 10
          [Phenology].FloweringToGrainFilling.Target.Value = 120
          [Phenology].GrainFilling.Target.Value = 530
          [Rachis].DMDemandFunction.MaximumOrganWt.Value = 14
          [Grain].NumberFunction.KernalsPerCob.XYPairs.X = 0, 14
          [Grain].NumberFunction.KernalsPerCob.XYPairs.Y = 0, 405
        Memo
          The variety Katumani Composite B was formed in 1966 and released in 1968 as part of the maize breeding work undertaken at the Katumani Research Station in Kenya which started in 1956.  Katumani Composite B was an advanced generation of Katumani Synthetic V X Katumani Synthetic VI.  It has slight photoperiod sensitivity and relatively small potential cob size.
      Cultivar Dekalb_XL82
        Command:
          [Phenology].Juvenile.Target.Value = 211
          [Phenology].Photosensitive.Target.XYPairs.X = 0, 12.5, 24
          [Phenology].Photosensitive.Target.XYPairs.Y = 0, 0, 472
          [Phenology].FlagLeafToFlowering.Target.Value = 101
          [Phenology].FloweringToGrainFilling.Target.Value = 170
          [Phenology].GrainFilling.Target.Value = 813
          [Rachis].DMDemandFunction.MaximumOrganWt.Value = 25
          [Grain].NumberFunction.KernalsPerCob.XYPairs.X = 0, 25
          [Grain].NumberFunction.KernalsPerCob.XYPairs.Y = 0, 550
      Cultivar GH_5009
        Command:
          [Phenology].Juvenile.Target.Value = 220
          [Phenology].Photosensitive.Target.XYPairs.X = 0, 12.5, 24
          [Phenology].Photosensitive.Target.XYPairs.Y = 0, 0, 300
          [Phenology].FlagLeafToFlowering.Target.Value = 50
          [Phenology].FloweringToGrainFilling.Target.Value = 170
          [Phenology].GrainFilling.Target.Value = 713
          [Rachis].DMDemandFunction.MaximumOrganWt.Value = 25
          [Grain].NumberFunction.KernalsPerCob.XYPairs.X = 0, 25
          [Grain].NumberFunction.KernalsPerCob.XYPairs.Y = 0, 550
      Cultivar Hycorn_40
        Command:
          [Phenology].Juvenile.Target.Value = 200
          [Phenology].Photosensitive.Target.XYPairs.X = 0, 12.5, 24
          [Phenology].Photosensitive.Target.XYPairs.Y = 0, 0, 300
          [Phenology].FlagLeafToFlowering.Target.Value = 50
          [Phenology].FloweringToGrainFilling.Target.Value = 170
          [Phenology].GrainFilling.Target.Value = 713
          [Rachis].DMDemandFunction.MaximumOrganWt.Value = 25
          [Grain].NumberFunction.KernalsPerCob.XYPairs.X = 0, 25
          [Grain].NumberFunction.KernalsPerCob.XYPairs.Y = 0, 550
      Cultivar GH_5019WX
        Command:
          [Phenology].Juvenile.Target.Value = 245
          [Phenology].Photosensitive.Target.XYPairs.X = 0, 12, 24
          [Phenology].Photosensitive.Target.XYPairs.Y = 0, 0, 300
          [Phenology].FlagLeafToFlowering.Target.Value = 101
          [Phenology].FloweringToGrainFilling.Target.Value = 170
          [Phenology].GrainFilling.Target.Value = 694
          [Rachis].DMDemandFunction.MaximumOrganWt.Value = 25
          [Grain].NumberFunction.KernalsPerCob.XYPairs.X = 0, 25
          [Grain].NumberFunction.KernalsPerCob.XYPairs.Y = 0, 550
      Cultivar Laila
        Command:
          [Phenology].Juvenile.Target.Value = 211
          [Phenology].Photosensitive.Target.XYPairs.X = 0, 12.5, 24
          [Phenology].Photosensitive.Target.XYPairs.Y = 0, 0, 0
          [Phenology].FlagLeafToFlowering.Target.Value = 1
          [Phenology].FloweringToGrainFilling.Target.Value = 170
          [Phenology].GrainFilling.Target.Value = 812
          [Phenology].Maturing.Target.Value = 1
          [Phenology].MaturityToHarvestRipe.Target.Value = 1
          [Rachis].DMDemandFunction.MaximumOrganWt.Value = 36
          [Grain].NumberFunction.KernalsPerCob.XYPairs.X = 0, 36
          [Grain].NumberFunction.KernalsPerCob.XYPairs.Y = 0, 720
      Cultivar Pioneer_39V43
        Command:
          [Phenology].Juvenile.Target.Value = 80
          [Phenology].GrainFilling.Target.Value = 450
          [Phenology].FloweringToGrainFilling.Target.Value = 170
          [Structure].MainStemNodeAppearanceRate.Phyllochron.Phyllochron.XYPairs.X = 1, 4, 4.2, 10.5, 11
          [Structure].MainStemNodeAppearanceRate.Phyllochron.Phyllochron.XYPairs.Y = 26, 26, 46, 46, 70
          [Rachis].DMDemandFunction.MaximumOrganWt.Value = 18
          [Structure].HeightModel.PotentialHeight.XYPairs.X = 3, 4, 5, 6
          [Structure].HeightModel.PotentialHeight.XYPairs.Y = 20, 40, 50, 1300
          [Stem].DMDemandFunction.PotentialDMAccumulation.PotentialInternodeWt.XYPairs.Y = 0, 0.15, 10
        Memo
          VShort duration variety released in New Zealand by Pioneer
      Cultivar Pioneer_34K77
        Command:
          [Phenology].Juvenile.Target.Value = 280
          [Phenology].GrainFilling.Target.Value = 550
        Memo
          VShort duration variety released in New Zealand by Pioneer
      Cultivar Pioneer_38H20
        Command:
          [Phenology].Juvenile.Target.Value = 150
          [Phenology].GrainFilling.Target.Value = 550
      Cultivar Pioneer_33M54: Command=[Phenology].GrainFilling.Target.Value = 550
  DataStore
    ExcelInput Observed: FileName=Observed.xlsx; SheetNames=[ObservedWarraBlock1]
    ExcelInput ObservedMoora: FileName=Observed.xlsx; SheetNames=[Moora, MooraET]
    PredictedObserved: PredictedTableName=DailyReport; ObservedTableName=ObservedWarraBlock1; FieldNameUsedForMatch=ZoneName; FieldName2UsedForMatch=Date
      Tests
        table={schema=[[[[[[[-, -, -, -, -, [[{base=xs:string}]]]]]]]]], diffgram=[[{{urn:schemas-microsoft-com:xml-diffgram-v1}id=StatTests1, {urn:schemas-microsoft-com:xml-msdata}rowOrder=0, {urn:schemas-microsoft-com:xml-diffgram-v1}hasChanges=inserted, Variable=Distance, Test=n, Old=103, New=103, Difference=0}, {{urn:schemas-microsoft-com:xml-diffgram-v1}id=StatTests2, {urn:schemas-microsoft-com:xml-msdata}rowOrder=1, {urn:schemas-microsoft-com:xml-diffgram-v1}hasChanges=inserted, Variable=Distance, Test=m, Old=0.996537, New=0.996537, Difference=0}, {{urn:schemas-microsoft-com:xml-diffgram-v1}id=StatTests3, {urn:schemas-microsoft-com:xml-msdata}rowOrder=2, {urn:schemas-microsoft-com:xml-diffgram-v1}hasChanges=inserted, Variable=Distance, Test=c, Old=0.70538, New=0.70538, Difference=0}, {{urn:schemas-microsoft-com:xml-diffgram-v1}id=StatTests4, {urn:schemas-microsoft-com:xml-msdata}rowOrder=3, {urn:schemas-microsoft-com:xml-diffgram-v1}hasChanges=inserted, Variable=Distance, Test=SEslope, Old=0.0101368, New=0.0101368, Difference=0}, {{urn:schemas-microsoft-com:xml-diffgram-v1}id=StatTests5, {urn:schemas-microsoft-com:xml-msdata}rowOrder=4, {urn:schemas-microsoft-com:xml-diffgram-v1}hasChanges=inserted, Variable=Distance, Test=SEcoeff, Old=0.273079, New=0.273079, Difference=0}, {{urn:schemas-microsoft-com:xml-diffgram-v1}id=StatTests6, {urn:schemas-microsoft-com:xml-msdata}rowOrder=5, {urn:schemas-microsoft-com:xml-diffgram-v1}hasChanges=inserted, Variable=Distance, Test=R2, Old=0.989658, New=0.989658, Difference=0}, {{urn:schemas-microsoft-com:xml-diffgram-v1}id=StatTests7, {urn:schemas-microsoft-com:xml-msdata}rowOrder=6, {urn:schemas-microsoft-com:xml-diffgram-v1}hasChanges=inserted, Variable=Distance, Test=ADJR2, Old=0.989555, New=0.989555, Difference=0}, {{urn:schemas-microsoft-com:xml-diffgram-v1}id=StatTests8, {urn:schemas-microsoft-com:xml-msdata}rowOrder=7, {urn:schemas-microsoft-com:xml-diffgram-v1}hasChanges=inserted, Variable=Distance, Test=R2YX, Old=1, New=1, Difference=0}, {{urn:schemas-microsoft-com:xml-diffgram-v1}id=StatTests9, {urn:schemas-microsoft-com:xml-msdata}rowOrder=8, {urn:schemas-microsoft-com:xml-diffgram-v1}hasChanges=inserted, Variable=Distance, Test=VarRatio, Old=9664.63, New=9664.63, Difference=0}, {{urn:schemas-microsoft-com:xml-diffgram-v1}id=StatTests10, {urn:schemas-microsoft-com:xml-msdata}rowOrder=9, {urn:schemas-microsoft-com:xml-diffgram-v1}hasChanges=inserted, Variable=Distance, Test=RMSD, Old=1.67584, New=1.67584, Difference=0}, {{urn:schemas-microsoft-com:xml-diffgram-v1}id=StatTests11, {urn:schemas-microsoft-com:xml-msdata}rowOrder=10, {urn:schemas-microsoft-com:xml-diffgram-v1}hasChanges=inserted, Variable=Distance, Test=NSE, Old=0.988109, New=0.988109, Difference=0}, {{urn:schemas-microsoft-com:xml-diffgram-v1}id=StatTests12, {urn:schemas-microsoft-com:xml-msdata}rowOrder=11, {urn:schemas-microsoft-com:xml-diffgram-v1}hasChanges=inserted, Variable=Distance, Test=ME, Old=-0.631068, New=-0.631068, Difference=0}, {{urn:schemas-microsoft-com:xml-diffgram-v1}id=StatTests13, {urn:schemas-microsoft-com:xml-msdata}rowOrder=12, {urn:schemas-microsoft-com:xml-diffgram-v1}hasChanges=inserted, Variable=Distance, Test=MAE, Old=0.631068, New=0.631068, Difference=0}, {{urn:schemas-microsoft-com:xml-diffgram-v1}id=StatTests14, {urn:schemas-microsoft-com:xml-msdata}rowOrder=13, {urn:schemas-microsoft-com:xml-diffgram-v1}hasChanges=inserted, Variable=Distance, Test=RSR, Old=0.000141396, New=0.000141396, Difference=0}, {{urn:schemas-microsoft-com:xml-diffgram-v1}id=StatTests15, {urn:schemas-microsoft-com:xml-msdata}rowOrder=14, {urn:schemas-microsoft-com:xml-diffgram-v1}hasChanges=inserted, Variable=SW90cm, Test=n, Old=199, New=199, Difference=0}, {{urn:schemas-microsoft-com:xml-diffgram-v1}id=StatTests16, {urn:schemas-microsoft-com:xml-msdata}rowOrder=15, {urn:schemas-microsoft-com:xml-diffgram-v1}hasChanges=inserted, Variable=SW90cm, Test=m, Old=1.04568, New=1.04568, Difference=0}, {{urn:schemas-microsoft-com:xml-diffgram-v1}id=StatTests17, {urn:schemas-microsoft-com:xml-msdata}rowOrder=16, {urn:schemas-microsoft-com:xml-diffgram-v1}hasChanges=inserted, Variable=SW90cm, Test=c, Old=5.24857, New=5.24857, Difference=0}, {{urn:schemas-microsoft-com:xml-diffgram-v1}id=StatTests18, {urn:schemas-microsoft-com:xml-msdata}rowOrder=17, {urn:schemas-microsoft-com:xml-diffgram-v1}hasChanges=inserted, Variable=SW90cm, Test=SEslope, Old=0.0185999, New=0.0185999, Difference=0}, {{urn:schemas-microsoft-com:xml-diffgram-v1}id=StatTests19, {urn:schemas-microsoft-com:xml-msdata}rowOrder=18, {urn:schemas-microsoft-com:xml-diffgram-v1}hasChanges=inserted, Variable=SW90cm, Test=SEcoeff, Old=3.30242, New=3.30242, Difference=0}, {{urn:schemas-microsoft-com:xml-diffgram-v1}id=StatTests20, {urn:schemas-microsoft-com:xml-msdata}rowOrder=19, {urn:schemas-microsoft-com:xml-diffgram-v1}hasChanges=inserted, Variable=SW90cm, Test=R2, Old=0.941328, New=0.941328, Difference=0}, {{urn:schemas-microsoft-com:xml-diffgram-v1}id=StatTests21, {urn:schemas-microsoft-com:xml-msdata}rowOrder=20, {urn:schemas-microsoft-com:xml-diffgram-v1}hasChanges=inserted, Variable=SW90cm, Test=ADJR2, Old=0.941031, New=0.941031, Difference=0}, {{urn:schemas-microsoft-com:xml-diffgram-v1}id=StatTests22, {urn:schemas-microsoft-com:xml-msdata}rowOrder=21, {urn:schemas-microsoft-com:xml-diffgram-v1}hasChanges=inserted, Variable=SW90cm, Test=R2YX, Old=1, New=1, Difference=0}, {{urn:schemas-microsoft-com:xml-diffgram-v1}id=StatTests23, {urn:schemas-microsoft-com:xml-msdata}rowOrder=22, {urn:schemas-microsoft-com:xml-diffgram-v1}hasChanges=inserted, Variable=SW90cm, Test=VarRatio, Old=3160.68, New=3160.68, Difference=0}, {{urn:schemas-microsoft-com:xml-diffgram-v1}id=StatTests24, {urn:schemas-microsoft-com:xml-msdata}rowOrder=23, {urn:schemas-microsoft-com:xml-diffgram-v1}hasChanges=inserted, Variable=SW90cm, Test=RMSD, Old=31.3096, New=31.3096, Difference=0}, {{urn:schemas-microsoft-com:xml-diffgram-v1}id=StatTests25, {urn:schemas-microsoft-com:xml-msdata}rowOrder=24, {urn:schemas-microsoft-com:xml-diffgram-v1}hasChanges=inserted, Variable=SW90cm, Test=NSE, Old=0.920864, New=0.920864, Difference=0}, {{urn:schemas-microsoft-com:xml-diffgram-v1}id=StatTests26, {urn:schemas-microsoft-com:xml-msdata}rowOrder=25, {urn:schemas-microsoft-com:xml-diffgram-v1}hasChanges=inserted, Variable=SW90cm, Test=ME, Old=-11.2548, New=-11.2548, Difference=0}, {{urn:schemas-microsoft-com:xml-diffgram-v1}id=StatTests27, {urn:schemas-microsoft-com:xml-msdata}rowOrder=26, {urn:schemas-microsoft-com:xml-diffgram-v1}hasChanges=inserted, Variable=SW90cm, Test=MAE, Old=15.7402, New=15.7402, Difference=0}, {{urn:schemas-microsoft-com:xml-diffgram-v1}id=StatTests28, {urn:schemas-microsoft-com:xml-msdata}rowOrder=27, {urn:schemas-microsoft-com:xml-diffgram-v1}hasChanges=inserted, Variable=SW90cm, Test=RSR, Old=0.00626255, New=0.00626255, Difference=0}, {{urn:schemas-microsoft-com:xml-diffgram-v1}id=StatTests29, {urn:schemas-microsoft-com:xml-msdata}rowOrder=28, {urn:schemas-microsoft-com:xml-diffgram-v1}hasChanges=inserted, Variable=BiomassWt, Test=n, Old=208, New=208, Difference=0}, {{urn:schemas-microsoft-com:xml-diffgram-v1}id=StatTests30, {urn:schemas-microsoft-com:xml-msdata}rowOrder=29, {urn:schemas-microsoft-com:xml-diffgram-v1}hasChanges=inserted, Variable=BiomassWt, Test=m, Old=0.976606, New=0.976606, Difference=0}, {{urn:schemas-microsoft-com:xml-diffgram-v1}id=StatTests31, {urn:schemas-microsoft-com:xml-msdata}rowOrder=30, {urn:schemas-microsoft-com:xml-diffgram-v1}hasChanges=inserted, Variable=BiomassWt, Test=c, Old=26.4094, New=26.4094, Difference=0}, {{urn:schemas-microsoft-com:xml-diffgram-v1}id=StatTests32, {urn:schemas-microsoft-com:xml-msdata}rowOrder=31, {urn:schemas-microsoft-com:xml-diffgram-v1}hasChanges=inserted, Variable=BiomassWt, Test=SEslope, Old=0.0444681, New=0.0444681, Difference=0}, {{urn:schemas-microsoft-com:xml-diffgram-v1}id=StatTests33, {urn:schemas-microsoft-com:xml-msdata}rowOrder=32, {urn:schemas-microsoft-com:xml-diffgram-v1}hasChanges=inserted, Variable=BiomassWt, Test=SEcoeff, Old=8.74921, New=8.74921, Difference=0}, {{urn:schemas-microsoft-com:xml-diffgram-v1}id=StatTests34, {urn:schemas-microsoft-com:xml-msdata}rowOrder=33, {urn:schemas-microsoft-com:xml-diffgram-v1}hasChanges=inserted, Variable=BiomassWt, Test=R2, Old=0.700724, New=0.700724, Difference=0}, {{urn:schemas-microsoft-com:xml-diffgram-v1}id=StatTests35, {urn:schemas-microsoft-com:xml-msdata}rowOrder=34, {urn:schemas-microsoft-com:xml-diffgram-v1}hasChanges=inserted, Variable=BiomassWt, Test=ADJR2, Old=0.699271, New=0.699271, Difference=0}, {{urn:schemas-microsoft-com:xml-diffgram-v1}id=StatTests36, {urn:schemas-microsoft-com:xml-msdata}rowOrder=35, {urn:schemas-microsoft-com:xml-diffgram-v1}hasChanges=inserted, Variable=BiomassWt, Test=R2YX, Old=1, New=1, Difference=0}, {{urn:schemas-microsoft-com:xml-diffgram-v1}id=StatTests37, {urn:schemas-microsoft-com:xml-msdata}rowOrder=36, {urn:schemas-microsoft-com:xml-diffgram-v1}hasChanges=inserted, Variable=BiomassWt, Test=VarRatio, Old=482.327, New=482.327, Difference=0}, {{urn:schemas-microsoft-com:xml-diffgram-v1}id=StatTests38, {urn:schemas-microsoft-com:xml-msdata}rowOrder=37, {urn:schemas-microsoft-com:xml-diffgram-v1}hasChanges=inserted, Variable=BiomassWt, Test=RMSD, Old=89.2421, New=89.2421, Difference=0}, {{urn:schemas-microsoft-com:xml-diffgram-v1}id=StatTests39, {urn:schemas-microsoft-com:xml-msdata}rowOrder=38, {urn:schemas-microsoft-com:xml-diffgram-v1}hasChanges=inserted, Variable=BiomassWt, Test=NSE, Old=0.564416, New=0.564416, Difference=0}, {{urn:schemas-microsoft-com:xml-diffgram-v1}id=StatTests40, {urn:schemas-microsoft-com:xml-msdata}rowOrder=39, {urn:schemas-microsoft-com:xml-diffgram-v1}hasChanges=inserted, Variable=BiomassWt, Test=ME, Old=-23.1554, New=-23.1554, Difference=0}, {{urn:schemas-microsoft-com:xml-diffgram-v1}id=StatTests41, {urn:schemas-microsoft-com:xml-msdata}rowOrder=40, {urn:schemas-microsoft-com:xml-diffgram-v1}hasChanges=inserted, Variable=BiomassWt, Test=MAE, Old=28.3746, New=28.3746, Difference=0}, {{urn:schemas-microsoft-com:xml-diffgram-v1}id=StatTests42, {urn:schemas-microsoft-com:xml-msdata}rowOrder=41, {urn:schemas-microsoft-com:xml-diffgram-v1}hasChanges=inserted, Variable=BiomassWt, Test=RSR, Old=0.189734, New=0.189734, Difference=0}, {{urn:schemas-microsoft-com:xml-diffgram-v1}id=StatTests43, {urn:schemas-microsoft-com:xml-msdata}rowOrder=42, {urn:schemas-microsoft-com:xml-diffgram-v1}hasChanges=inserted, Variable=GrainWt, Test=n, Old=215, New=215, Difference=0}, {{urn:schemas-microsoft-com:xml-diffgram-v1}id=StatTests44, {urn:schemas-microsoft-com:xml-msdata}rowOrder=43, {urn:schemas-microsoft-com:xml-diffgram-v1}hasChanges=inserted, Variable=GrainWt, Test=m, Old=0.950125, New=0.950125, Difference=0}, {{urn:schemas-microsoft-com:xml-diffgram-v1}id=StatTests45, {urn:schemas-microsoft-com:xml-msdata}rowOrder=44, {urn:schemas-microsoft-com:xml-diffgram-v1}hasChanges=inserted, Variable=GrainWt, Test=c, Old=31.7379, New=31.7379, Difference=0}, {{urn:schemas-microsoft-com:xml-diffgram-v1}id=StatTests46, {urn:schemas-microsoft-com:xml-msdata}rowOrder=45, {urn:schemas-microsoft-com:xml-diffgram-v1}hasChanges=inserted, Variable=GrainWt, Test=SEslope, Old=0.0444226, New=0.0444226, Difference=0}, {{urn:schemas-microsoft-com:xml-diffgram-v1}id=StatTests47, {urn:schemas-microsoft-com:xml-msdata}rowOrder=46, {urn:schemas-microsoft-com:xml-diffgram-v1}hasChanges=inserted, Variable=GrainWt, Test=SEcoeff, Old=8.724, New=8.724, Difference=0}, {{urn:schemas-microsoft-com:xml-diffgram-v1}id=StatTests48, {urn:schemas-microsoft-com:xml-msdata}rowOrder=47, {urn:schemas-microsoft-com:xml-diffgram-v1}hasChanges=inserted, Variable=GrainWt, Test=R2, Old=0.682308, New=0.682308, Difference=0}, {{urn:schemas-microsoft-com:xml-diffgram-v1}id=StatTests49, {urn:schemas-microsoft-com:xml-msdata}rowOrder=48, {urn:schemas-microsoft-com:xml-diffgram-v1}hasChanges=inserted, Variable=GrainWt, Test=ADJR2, Old=0.680817, New=0.680817, Difference=0}, {{urn:schemas-microsoft-com:xml-diffgram-v1}id=StatTests50, {urn:schemas-microsoft-com:xml-msdata}rowOrder=49, {urn:schemas-microsoft-com:xml-diffgram-v1}hasChanges=inserted, Variable=GrainWt, Test=R2YX, Old=1, New=1, Difference=0}, {{urn:schemas-microsoft-com:xml-diffgram-v1}id=StatTests51, {urn:schemas-microsoft-com:xml-msdata}rowOrder=50, {urn:schemas-microsoft-com:xml-diffgram-v1}hasChanges=inserted, Variable=GrainWt, Test=VarRatio, Old=457.462, New=457.462, Difference=0}, {{urn:schemas-microsoft-com:xml-diffgram-v1}id=StatTests52, {urn:schemas-microsoft-com:xml-msdata}rowOrder=51, {urn:schemas-microsoft-com:xml-diffgram-v1}hasChanges=inserted, Variable=GrainWt, Test=RMSD, Old=90.7434, New=90.7434, Difference=0}, {{urn:schemas-microsoft-com:xml-diffgram-v1}id=StatTests53, {urn:schemas-microsoft-com:xml-msdata}rowOrder=52, {urn:schemas-microsoft-com:xml-diffgram-v1}hasChanges=inserted, Variable=GrainWt, Test=NSE, Old=0.545408, New=0.545408, Difference=0}, {{urn:schemas-microsoft-com:xml-diffgram-v1}id=StatTests54, {urn:schemas-microsoft-com:xml-msdata}rowOrder=53, {urn:schemas-microsoft-com:xml-diffgram-v1}hasChanges=inserted, Variable=GrainWt, Test=ME, Old=-24.8344, New=-24.8344, Difference=0}, {{urn:schemas-microsoft-com:xml-diffgram-v1}id=StatTests55, {urn:schemas-microsoft-com:xml-msdata}rowOrder=54, {urn:schemas-microsoft-com:xml-diffgram-v1}hasChanges=inserted, Variable=GrainWt, Test=MAE, Old=31.6066, New=31.6066, Difference=0}, {{urn:schemas-microsoft-com:xml-diffgram-v1}id=StatTests56, {urn:schemas-microsoft-com:xml-msdata}rowOrder=55, {urn:schemas-microsoft-com:xml-diffgram-v1}hasChanges=inserted, Variable=GrainWt, Test=RSR, Old=0.206654, New=0.206654, Difference=0}, {{urn:schemas-microsoft-com:xml-diffgram-v1}id=StatTests57, {urn:schemas-microsoft-com:xml-msdata}rowOrder=56, {urn:schemas-microsoft-com:xml-diffgram-v1}hasChanges=inserted, Variable=GrainSize, Test=n, Old=215, New=215, Difference=0}, {{urn:schemas-microsoft-com:xml-diffgram-v1}id=StatTests58, {urn:schemas-microsoft-com:xml-msdata}rowOrder=57, {urn:schemas-microsoft-com:xml-diffgram-v1}hasChanges=inserted, Variable=GrainSize, Test=m, Old=0.950125, New=0.950125, Difference=0}, {{urn:schemas-microsoft-com:xml-diffgram-v1}id=StatTests59, {urn:schemas-microsoft-com:xml-msdata}rowOrder=58, {urn:schemas-microsoft-com:xml-diffgram-v1}hasChanges=inserted, Variable=GrainSize, Test=c, Old=31.7379, New=31.7379, Difference=0}, {{urn:schemas-microsoft-com:xml-diffgram-v1}id=StatTests60, {urn:schemas-microsoft-com:xml-msdata}rowOrder=59, {urn:schemas-microsoft-com:xml-diffgram-v1}hasChanges=inserted, Variable=GrainSize, Test=SEslope, Old=0.0444226, New=0.0444226, Difference=0}, {{urn:schemas-microsoft-com:xml-diffgram-v1}id=StatTests61, {urn:schemas-microsoft-com:xml-msdata}rowOrder=60, {urn:schemas-microsoft-com:xml-diffgram-v1}hasChanges=inserted, Variable=GrainSize, Test=SEcoeff, Old=8.724, New=8.724, Difference=0}, {{urn:schemas-microsoft-com:xml-diffgram-v1}id=StatTests62, {urn:schemas-microsoft-com:xml-msdata}rowOrder=61, {urn:schemas-microsoft-com:xml-diffgram-v1}hasChanges=inserted, Variable=GrainSize, Test=R2, Old=0.682308, New=0.682308, Difference=0}, {{urn:schemas-microsoft-com:xml-diffgram-v1}id=StatTests63, {urn:schemas-microsoft-com:xml-msdata}rowOrder=62, {urn:schemas-microsoft-com:xml-diffgram-v1}hasChanges=inserted, Variable=GrainSize, Test=ADJR2, Old=0.680817, New=0.680817, Difference=0}, {{urn:schemas-microsoft-com:xml-diffgram-v1}id=StatTests64, {urn:schemas-microsoft-com:xml-msdata}rowOrder=63, {urn:schemas-microsoft-com:xml-diffgram-v1}hasChanges=inserted, Variable=GrainSize, Test=R2YX, Old=1, New=1, Difference=0}, {{urn:schemas-microsoft-com:xml-diffgram-v1}id=StatTests65, {urn:schemas-microsoft-com:xml-msdata}rowOrder=64, {urn:schemas-microsoft-com:xml-diffgram-v1}hasChanges=inserted, Variable=GrainSize, Test=VarRatio, Old=457.462, New=457.462, Difference=0}, {{urn:schemas-microsoft-com:xml-diffgram-v1}id=StatTests66, {urn:schemas-microsoft-com:xml-msdata}rowOrder=65, {urn:schemas-microsoft-com:xml-diffgram-v1}hasChanges=inserted, Variable=GrainSize, Test=RMSD, Old=90.7434, New=90.7434, Difference=0}, {{urn:schemas-microsoft-com:xml-diffgram-v1}id=StatTests67, {urn:schemas-microsoft-com:xml-msdata}rowOrder=66, {urn:schemas-microsoft-com:xml-diffgram-v1}hasChanges=inserted, Variable=GrainSize, Test=NSE, Old=0.545408, New=0.545408, Difference=0}, {{urn:schemas-microsoft-com:xml-diffgram-v1}id=StatTests68, {urn:schemas-microsoft-com:xml-msdata}rowOrder=67, {urn:schemas-microsoft-com:xml-diffgram-v1}hasChanges=inserted, Variable=GrainSize, Test=ME, Old=-24.8344, New=-24.8344, Difference=0}, {{urn:schemas-microsoft-com:xml-diffgram-v1}id=StatTests69, {urn:schemas-microsoft-com:xml-msdata}rowOrder=68, {urn:schemas-microsoft-com:xml-diffgram-v1}hasChanges=inserted, Variable=GrainSize, Test=MAE, Old=31.6066, New=31.6066, Difference=0}, {{urn:schemas-microsoft-com:xml-diffgram-v1}id=StatTests70, {urn:schemas-microsoft-com:xml-msdata}rowOrder=69, {urn:schemas-microsoft-com:xml-diffgram-v1}hasChanges=inserted, Variable=GrainSize, Test=RSR, Old=0.206654, New=0.206654, Difference=0}]]}
    PredictedObserved PredictedObservedMoora: PredictedTableName=DailyReport; ObservedTableName=Moora; FieldNameUsedForMatch=ZoneName; FieldName2UsedForMatch=Date
    ExcelInput ObservedMachakos: FileName=OdhiamboObserved.xlsx; SheetNames=[OBSCrop, OBSSW35cm, OBSSW55cm, OBSSW75cm]
    PredictedObserved PvO35cm: PredictedTableName=DailyReport; ObservedTableName=OBSSW35cm; FieldNameUsedForMatch=ZoneName; FieldName2UsedForMatch=Date
    PredictedObserved PvO55cm: PredictedTableName=DailyReport; ObservedTableName=OBSSW55cm; FieldNameUsedForMatch=ZoneName; FieldName2UsedForMatch=Date
    PredictedObserved PvO75cm: PredictedTableName=DailyReport; ObservedTableName=OBSSW75cm; FieldNameUsedForMatch=ZoneName; FieldName2UsedForMatch=Date
  Simulation Moora: Area=0; Slope=0
    Memo
      Data from Western Australia [Lefroy2001] present results for the fodder tree tagasaste (*Chamaecytisus proliferus* Link.) at alley and plantation densities on a deep sand at Moora.  Alleys were planted as single rows of trees 30 m apart orientated north–south with 0.7 m between trees within a row.
      The soil was a coarse, very infertile acid sand with pH (CaCl2) 5.2 at the surface and 4.8 between 1 and 3 m. Water holding capacity was very low, with a drained upper limit of 0.10 and a lower limit of 0.03 m<sup>3</sup>/m<sup>3</sup>. A permanent fresh (<1 dS/m) perched watertable has developed over a clay layer approximately 10 m below the surface. Soil water content was measured with neutron probes at 20-cm intervals to a depth of 3.7 m from July 1996 to December 1998 at 2-week intervals in winter and monthly during summer.  Transpiration was measured using sapflow sensors.  The data shown here are for the alley-fallow plots, which had Tagastaste rows spaced at 30m with no crop planted in between.
    Clock: StartDate=1996-09-17; EndDate=1997-12-31
    Summary SummaryFile
    Weather: FileName=moora.met
    SoilArbitrator Soil Arbitrator
    AgroforestrySystem WindbreakSystem: Area=0.185; Slope=0; RainfallInterceptionFraction=0; RainShaddowWidth=0
      TreeProxy: RootRadius=0.02; NumberOfTrees=0; Kd=1E-07; BaseKL=0.05; KValue=0.5; dates=[1996-06-20, 1997-06-08, 1998-05-06]; heights=[1000, 5000, 10000]; NDemands=[0.1, 0.1, 0.1]; CanopyWidths=[0.4, 0.85, 1.25]; TreeLeafAreas=[0.5, 0.6, 0.1]
        Table=[[Parameter, 0, 0.5h, 1h, 1.5h, 2h, 2.5h, 3h, 4h, 5h, 6h], [Shade (%), Root Length Density (cm/cm3), Depth (cm), 0-10, 10-20, 20-30, 30-60, 60-90, 90-120, 120-150, 150-200, 200-250, 250-300, 300-370], [100, , , 1, 1, 1, 1, 1, 1, 1, 1, 1, 1, 1], [100, , , 1, 1, 1, 1, .5, .5, .5, .3, .3, .2, .2], [0, , , 1, 1, 1, 1, .5, .5, .5, 0, 0, 0, 0], [0, , , 1, 1, 1, 1, .5, .5, .5, 0, 0, 0, 0], [0, , , 1, 1, 1, 1, .5, .5, .5, 0, 0, 0, 0], [0, , , 1, 1, 1, 1, .5, .5, .5, 0, 0, 0, 0], [0, , , 1, 1, 1, 1, .5, .5, .5, 0, 0, 0, 0], [0, , , 1, 1, 1, 1, .5, .5, .5, 0, 0, 0, 0], [0, , , 1, 1, 1, 1, .5, .5, .5, 0, 0, 0, 0], [0, , , 0, 0, 0, 0, 0, 0, 0, 0, 0, 0, 0]]
      Report TreeReport: EventNames=[Clock].DoReport
        VariableNames:
          [Clock].Today
          [TreeProxy].TreeWaterUptake
          [TreeProxy].IndividualTreeWaterDemand
          [TreeProxy].IndividualTreeWaterUptake
      RectangularZone TreeRow: Area=0.005; Slope=0; Length=100; Width=0.5
        LocalMicroClimate
        MicroClimate: a_interception=0; b_interception=0; c_interception=0; d_interception=0; soil_albedo=0.23; air_pressure=1010; soil_emissivity=0.96; sun_angle=15; soil_heat_flux_fraction=0.4; night_interception_fraction=0.5; windspeed_default=3; refheight=2; albedo=0.15; emissivity=0.96; gsmax=0.01; r50=200
        Report
          VariableNames:
            [Clock].Today
            [Zone].Area
            Distance
            Radn
            [LocalMicroClimate].Radn
            [TreeProxy].Shade
        Report DailyReport: EventNames=[Clock].DoReport
          VariableNames:
            [Clock].Today as Date
            Distance
            LocalMicroClimate.Wind
            sum([Soil].NO3N) as TotalNO3N
            sum([Soil].NH4N) as TotalNH4N
            sum([TreeProxy].WaterUptake) as WaterUptake
            sum([Soil].SoilWater.SWmm[1:5]) as SW90cm
            [TreeProxy].Urel
            [TreeProxy].H
            [TreeProxy].SWDemand
            [TreeProxy].heightToday
            [MicroClimate].peta
            [MicroClimate].petr
            [Soil].SoilWater.Eo
            [TreeProxy].WaterStress
            [Soil].SoilWater.SW[1] as SurfaceSW
            [Soil].SoilWater.ESW as ESW
        Fertiliser
        SurfaceOrganicMatter: PoolName=wheat_stubble; type=wheat; mass=500; standing_fraction=0; cnr=100; CriticalResidueWeight=2000; OptimumDecompTemp=20; MaxCumulativeEOS=20; CNRatioDecompCoeff=0.277; CNRatioDecompThreshold=25; TotalLeachRain=25; MinRainToLeach=10; CriticalMinimumOrganicC=0.004; DefaultCPRatio=0; DefaultStandingFraction=0; StandingExtinctCoeff=0.5; FractionFaecesAdded=0.5
          Pools:
            {PoolName=wheat_stubble, ResidueType=wheat, Mass=500, CNRatio=100, StandingFraction=0}
          ResidueTypes: LoadFromResource=ResidueTypes
        Soil: ASCOrder=Vertosol; ASCSubOrder=Grey; SoilType=Clay; Site=Warra; NearestTown=Warra, Q, 4411; Region=Darling Downs and Granite Belt; State=Queensland; Country=Australia; NaturalVegetation=Brigalow scrub; ApsoilNumber=19; Latitude=-26.897; Longitude=150.909; LocationAccuracy=+/- 20m; DataSource=0; Comments=CSIRO Sustainable Ecosystems, Toowoomba
          Water
            Thickness  BD   AirDry  LL15  DUL   SAT   KS
            100        1.8  0.01    0.02  0.08  0.32  200
            100        1.8  0.01    0.02  0.08  0.32  200
            100        1.8  0.01    0.02  0.08  0.32  200
            300        1.8  0.01    0.02  0.08  0.32  200
            300        1.8  0.01    0.02  0.08  0.32  200
            300        1.8  0.01    0.02  0.08  0.32  200
            300        1.8  0.01    0.02  0.08  0.32  200
            500        1.8  0.01    0.02  0.07  0.32  200
            500        1.8  0.01    0.02  0.07  0.32  200
            500        1.8  0.01    0.02  0.07  0.32  200
            700        1.8  0.01    0.02  0.07  0.32  200
          SoilWater: residueinterception=0; SummerDate=1-Nov; SummerU=4; SummerCona=2; WinterDate=1-Apr; WinterU=4; WinterCona=2; DiffusConst=88; DiffusSlope=35; Salb=0.12; CN2Bare=60; CNRed=20; CNCov=0.8; max_pond=0; Thickness=[150, 150, 300, 300, 300, 2500]; SWCON=[0.7, 0.7, 0.7, 0.7, 0.7, 0.7]
          SoilNitrogen: fom_type=[default, manure, mucuna, lablab, shemp, stable]; fract_carb=[0.2, 0.3, 0.54, 0.57, 0.45, 0]; fract_cell=[0.7, 0.3, 0.37, 0.37, 0.47, 0.1]; fract_lign=[0.1, 0.4, 0.09, 0.06, 0.08, 0.9]; wfpsN2N2O_x=[22, 88]; wfpsN2N2O_y=[0.1, 1]
          SoilOrganicMatter: RootCN=40; RootWt=1000; SoilCN=12; EnrACoeff=7.4; EnrBCoeff=0.2; OCUnits=Total
            Thickness  OC     FBiom  FInert
            150        0.915  0.04   0.4
            150        0.777  0.02   0.6
            300        0.346  0.02   0.8
            300        0.231  0.02   1
            300        0.154  0.01   1
            300        0.123  0.01   1
          Analysis: Thickness=[150, 150, 300, 300, 300, 300]; PH=[8, 8, 8, 8, 8, 8]; PHUnits=Water; BoronUnits=HotWater
          Sample InitialN: NO3Units=ppm; NH4Units=ppm; SWUnits=Volumetric; OCUnits=Total; PHUnits=Water
            Thickness  NO3  NH4
            150        1    0.1
            150        1    0.1
            300        1    0.1
            300        1    0.1
            300        1    0.1
            300        1    0.1
          Fertiliser
          Sample: NO3Units=ppm; NH4Units=ppm; SWUnits=Volumetric; OCUnits=Total; PHUnits=Water
            Thickness  NO3  NH4  SW
            50         1    0.1  0.02
            100        1    0.1  0.02
            150        1    0.1  0.02
            300        1    0.1  0.03
            300        1    0.1  0.05
            300        1    0.1  0.06
            2500       1    0.1  0.07
      RectangularZone 1m: Area=0.01; Slope=0; Length=100; Width=1
        LocalMicroClimate
        MicroClimate: same as Moora.WindbreakSystem.TreeRow.MicroClimate
        Report DailyReport: EventNames=[Clock].DoReport
          VariableNames:
            [Clock].Today as Date
            Distance
            LocalMicroClimate.Wind
            sum([Soil].SoilWater.SWmm[1:4]) as SW90cm
            sum([Soil].NO3N) as TotalNO3N
            sum([Soil].NH4N) as TotalNH4N
            [MicroClimate].peta
            [MicroClimate].petr
            [Wheat].AboveGround.Wt as BiomassWt
            [Wheat].Grain.Wt as GrainWt
            [Soil].SoilWater.SW[1] as SurfaceSW
            [Soil].SoilWater.ESW as ESW
        Fertiliser
        SurfaceOrganicMatter: same as Moora.WindbreakSystem.TreeRow.SurfaceOrganicMatter
        Soil: ASCOrder=Vertosol; ASCSubOrder=Grey; SoilType=Clay; Site=Warra; NearestTown=Warra, Q, 4411; Region=Darling Downs and Granite Belt; State=Queensland; Country=Australia; NaturalVegetation=Brigalow scrub; ApsoilNumber=19; Latitude=-26.897; Longitude=150.909; LocationAccuracy=+/- 20m; DataSource=0; Comments=CSIRO Sustainable Ecosystems, Toowoomba
          Water: same as Moora.WindbreakSystem.TreeRow.Soil.Water
          SoilWater: same as Moora.WindbreakSystem.TreeRow.Soil.SoilWater
          SoilNitrogen: fom_type=[default, manure, mucuna, lablab, shemp, stable]; fract_carb=[0.2, 0.3, 0.54, 0.57, 0.45, 0]; fract_cell=[0.7, 0.3, 0.37, 0.37, 0.47, 0.1]; fract_lign=[0.1, 0.4, 0.09, 0.06, 0.08, 0.9]; wfpsN2N2O_x=[22, 88]; wfpsN2N2O_y=[0.1, 1]
          SoilOrganicMatter: same as Moora.WindbreakSystem.TreeRow.Soil.SoilOrganicMatter
          Analysis: Thickness=[150, 150, 300, 300, 300, 300]; PH=[8, 8, 8, 8, 8, 8]; PHUnits=Water; BoronUnits=HotWater
          Sample: NO3Units=ppm; NH4Units=ppm; SWUnits=Volumetric; OCUnits=Total; PHUnits=Water
            Thickness  NO3  NH4  SW
            50         1    0.1  0.02
            100        1    0.1  0.02
            150        1    0.1  0.02
            300        1    0.1  0.03
            300        1    0.1  0.05
            300        1    0.1  0.06
            2500       1    0.1  0.07
      RectangularZone 2m: Area=0.01; Slope=0; Length=100; Width=1
        LocalMicroClimate
        MicroClimate: same as Moora.WindbreakSystem.TreeRow.MicroClimate
        Report DailyReport: same as Moora.WindbreakSystem.1m.DailyReport
        Fertiliser
        SurfaceOrganicMatter: same as Moora.WindbreakSystem.TreeRow.SurfaceOrganicMatter
        Soil: ASCOrder=Vertosol; ASCSubOrder=Grey; SoilType=Clay; Site=Warra; NearestTown=Warra, Q, 4411; Region=Darling Downs and Granite Belt; State=Queensland; Country=Australia; NaturalVegetation=Brigalow scrub; ApsoilNumber=19; Latitude=-26.897; Longitude=150.909; LocationAccuracy=+/- 20m; DataSource=0; Comments=CSIRO Sustainable Ecosystems, Toowoomba
          Water: same as Moora.WindbreakSystem.TreeRow.Soil.Water
          SoilWater: same as Moora.WindbreakSystem.TreeRow.Soil.SoilWater
          SoilNitrogen: fom_type=[default, manure, mucuna, lablab, shemp, stable]; fract_carb=[0.2, 0.3, 0.54, 0.57, 0.45, 0]; fract_cell=[0.7, 0.3, 0.37, 0.37, 0.47, 0.1]; fract_lign=[0.1, 0.4, 0.09, 0.06, 0.08, 0.9]; wfpsN2N2O_x=[22, 88]; wfpsN2N2O_y=[0.1, 1]
          SoilOrganicMatter: same as Moora.WindbreakSystem.TreeRow.Soil.SoilOrganicMatter
          Analysis: Thickness=[150, 150, 300, 300, 300, 300]; PH=[8, 8, 8, 8, 8, 8]; PHUnits=Water; BoronUnits=HotWater
          Sample: NO3Units=ppm; NH4Units=ppm; SWUnits=Volumetric; OCUnits=Total; PHUnits=Water
            Thickness  NO3  NH4  SW
            50         1    0.1  0.04
            100        1    0.1  0.04
            150        1    0.1  0.04
            300        1    0.1  0.06
            300        1    0.1  0.08
            300        1    0.1  0.08
            2500       1    0.1  0.07
      RectangularZone 3m: Area=0.01; Slope=0; Length=100; Width=1
        LocalMicroClimate
        MicroClimate: same as Moora.WindbreakSystem.TreeRow.MicroClimate
        Report DailyReport: same as Moora.WindbreakSystem.1m.DailyReport
        Fertiliser
        SurfaceOrganicMatter: same as Moora.WindbreakSystem.TreeRow.SurfaceOrganicMatter
        Soil: ASCOrder=Vertosol; ASCSubOrder=Grey; SoilType=Clay; Site=Warra; NearestTown=Warra, Q, 4411; Region=Darling Downs and Granite Belt; State=Queensland; Country=Australia; NaturalVegetation=Brigalow scrub; ApsoilNumber=19; Latitude=-26.897; Longitude=150.909; LocationAccuracy=+/- 20m; DataSource=0; Comments=CSIRO Sustainable Ecosystems, Toowoomba
          Water: same as Moora.WindbreakSystem.TreeRow.Soil.Water
          SoilWater: same as Moora.WindbreakSystem.TreeRow.Soil.SoilWater
          SoilNitrogen: fom_type=[default, manure, mucuna, lablab, shemp, stable]; fract_carb=[0.2, 0.3, 0.54, 0.57, 0.45, 0]; fract_cell=[0.7, 0.3, 0.37, 0.37, 0.47, 0.1]; fract_lign=[0.1, 0.4, 0.09, 0.06, 0.08, 0.9]; wfpsN2N2O_x=[22, 88]; wfpsN2N2O_y=[0.1, 1]
          SoilOrganicMatter: same as Moora.WindbreakSystem.TreeRow.Soil.SoilOrganicMatter
          Analysis: Thickness=[150, 150, 300, 300, 300, 300]; PH=[8, 8, 8, 8, 8, 8]; PHUnits=Water; BoronUnits=HotWater
          Sample: NO3Units=ppm; NH4Units=ppm; SWUnits=Volumetric; OCUnits=Total; PHUnits=Water
            Thickness  NO3  NH4  SW
            50         1    0.1  0.08
            100        1    0.1  0.08
            150        1    0.1  0.08
            300        1    0.1  0.08
            300        1    0.1  0.08
            300        1    0.1  0.08
            2500       1    0.1  0.07
      RectangularZone 4m: same as Moora.WindbreakSystem.3m
      RectangularZone 5_5m: Area=0.02; Slope=0; Length=100; Width=2
        LocalMicroClimate
        MicroClimate: same as Moora.WindbreakSystem.TreeRow.MicroClimate
        Report DailyReport: same as Moora.WindbreakSystem.1m.DailyReport
        Fertiliser
        SurfaceOrganicMatter: same as Moora.WindbreakSystem.TreeRow.SurfaceOrganicMatter
        Soil: same as Moora.WindbreakSystem.3m.Soil
      RectangularZone 8m: Area=0.03; Slope=0; Length=100; Width=3
        LocalMicroClimate
        MicroClimate: same as Moora.WindbreakSystem.TreeRow.MicroClimate
        Report DailyReport: same as Moora.WindbreakSystem.1m.DailyReport
        Fertiliser
        SurfaceOrganicMatter: same as Moora.WindbreakSystem.TreeRow.SurfaceOrganicMatter
        Soil: same as Moora.WindbreakSystem.3m.Soil
      RectangularZone 11_5m: Area=0.04; Slope=0; Length=100; Width=4
        LocalMicroClimate
        MicroClimate: same as Moora.WindbreakSystem.TreeRow.MicroClimate
        Report DailyReport: same as Moora.WindbreakSystem.1m.DailyReport
        Fertiliser
        SurfaceOrganicMatter: same as Moora.WindbreakSystem.TreeRow.SurfaceOrganicMatter
        Soil: same as Moora.WindbreakSystem.3m.Soil
      RectangularZone 16m: Area=0.05; Slope=0; Length=100; Width=5
        LocalMicroClimate
        MicroClimate: same as Moora.WindbreakSystem.TreeRow.MicroClimate
        Report DailyReport: same as Moora.WindbreakSystem.1m.DailyReport
        Fertiliser
        SurfaceOrganicMatter: same as Moora.WindbreakSystem.TreeRow.SurfaceOrganicMatter
        Soil: same as Moora.WindbreakSystem.3m.Soil
  Simulation Warra: Area=0; Slope=0
    Memo
      This test evaluates the performance of the APSIM AgroforestrySystem model in simulating the crop and soil water data for the data of [HuthPhD2010].  Monitoring of tree-crop interactions was undertaken on a farm near the township of Warra, Qld (26.93<sup>o</sup>S, 150.93<sup>o</sup>E), where a belt of four rows of Eucalyptus argophloia at approximately 5 x 5 m spacing had been planted along the edge of fields used to grow wheat (*Triticum aestivum* L.), cotton (*Gossypium hirsutum* L.) and chickpeas (*Cicer arietinum* L.). The trees were about 7 years old and nearly 10 m high at the start of the study. Tree-crop interactions were monitored over 3 cropping seasons (two winters and one summer) in two bays on opposite sides of the eucalypt belt. Agronomic management in the two cropping bays varied as they were at different stages of a cropping rotation. The bay used in this model test was sown to wheat in the winter of 2004 and remained fallow during the ensuing summer and winter growing seasons. Prior to harvest of the crop, plant samples were taken from quadrats consisting of 1 m of each plant row in 5 linear transects out to 50 m from the shelterbelt [HuthRobertsonPoulton2010]. As germination failure was significant next to the trees, sampling positions were at 25, 30, 35, 40 and 50 m. The monitoring of soil moisture and its extraction by both trees and crops was undertaken using electromagnetic induction measurements [HuthPoulton2007] taken at 5 m intervals in four 50 m transects from the belt of trees.

      The simulations were developed using data from various sources. Rainfall data were obtained from an Australian Bureau of Meteorology rainfall station (No. 41291) situated on a farm 4.1 km from the study site. Soil properties were based on the data of [HuthRobertsonPoulton2010].

      NOTE: Yield predictions at this site are adequate, but an issue with simulating failed germination has been identified.  Data from the trial show complete germination failure out to a distance of 22 m from the trees.  The APSIM-Wheat model was not able to capture this germination failure, though much of the yield impact was captured through competition for water resources.
    Clock: StartDate=2004-03-22; EndDate=2005-10-04
    Summary SummaryFile
    Weather: FileName=Validation\warra.met
    SoilArbitrator Soil Arbitrator
    AgroforestrySystem WindbreakSystem: Area=0.55; Slope=0; RainfallInterceptionFraction=0; RainShaddowWidth=0
      Manager SowingRule
        SowDate = 26/06/2004
        CultivarName = h45
        SowingDepth = 30
        RowSpacing = 250
        Population = 120
        Amount = 60
        CropName = wheat
```csharp
using System;
using System.Collections.Generic;
using Models.Core;
using Models.Agroforestry;
using Models.PMF.OldPlant;
using Models.Soils;
using Models.Utilities;
using Models.Zones;
using APSIM.Shared.Utilities;

namespace Models
{
	[Serializable]
	public class Script : Model
	{
		[Link] Clock Clock;
		[Link] Summary Summary;
		
		[Description("Sowing date (d-mmm-yyyy)")]
		public string SowDate { get; set; }
		[Description("Cultivar to be sown")]
		public string CultivarName { get; set; }
		[Description("Sowing depth (mm)")]
		public double SowingDepth { get; set; }
		[Description("Row spacing (mm)")]
		public double RowSpacing { get; set; }
		[Description("Plant population (/m2)")]
		public double Population { get; set; }
		[Description("Amount of fertiliser to be applied (kg/ha)")]
		public double Amount { get; set; }
		[Description("Crop to be fertilised")]
		public string CropName { get; set; }
		
		private List<IModel> Zones;
		private Plant15 Wheat;
		private Soil Soil;
		
		[EventSubscribe("Commencing")]
		private void OnSimulationCommencing(object sender, EventArgs e)
		{
			Zones = Apsim.FindAll(this, typeof(RectangularZone));
		}
		
		[EventSubscribe("DoManagement")]
		private void OnDoManagement(object sender, EventArgs e)
		{		
			if (DateUtilities.DMYtoDate(SowDate) == Clock.Today)
			{
			
				foreach (Zone z in Zones)
				{
					Wheat = Apsim.Find(z, typeof(Plant15)) as Plant15;	
					Soil = Apsim.Find(z, typeof(Soil)) as Soil;
							
					if (Wheat != null && Wheat.plant_status == "out")
					{
						Wheat.Sow(population: Population, cultivar: CultivarName, depth: SowingDepth, rowSpacing: RowSpacing);
						Fertiliser Fertiliser = Apsim.Find(Wheat.Parent, typeof(Fertiliser)) as Fertiliser;
						Fertiliser.Apply(Amount: Amount, Type: Fertiliser.Types.NO3N);
					}
					//else
					//	throw new ApsimXException(null, "Cannot sow wheat on that date");
				}
			}
		}
	}
}
```
      TreeProxy: RootRadius=0.02; NumberOfTrees=0; Kd=1E-07; BaseKL=0.05; KValue=0.5; heights=[10000, 10000, 10000, 10000, 10000]; NDemands=[0.1, 0.1, 0.1, 0.1, 0.1]; CanopyWidths=[0.1, 0.1, 0.1, 0.1, 0.1]; TreeLeafAreas=[0.1, 0.1, 0.1, 0.1, 0.1]
        Table=[[Parameter, 0, 0.5h, 1h, 1.5h, 2h, 2.5h, 3h, 4h, 5h, 6h], [Shade (%), Root Length Density (cm/cm3), Depth (cm), 0-5, 5-15, 15-30, 30-60, 60-90, 90-120, 120-150], [80, , , 1, 1, .6, .3, .2, .1, .1], [0, , , .6, .6, .3, .2, .1, .1, .1], [0, , , .3, .3, .1, .1, .1, .1, 0], [0, , , .2, .2, .1, .1, .05, .05, 0], [0, , , .02, .02, .02, .02, .01, 0, 0], [0, , , .01, .01, .01, 0, 0, 0, 0], [0, , , .01, .01, .01, 0, 0, 0, 0], [0, , , 0, 0, 0, 0, 0, 0, 0], [0, , , 0, 0, 0, 0, 0, 0, 0], [0, , , 0, 0, 0, 0, 0, 0, 0]]
        dates=[1900-01-01, 1900-03-01, 1900-06-01, 1900-09-01, 1900-12-31]
      Report TreeReport: EventNames=[Clock].DoReport
        VariableNames:
          [Clock].Today as Date
          [TreeProxy].TreeWaterUptake
      RectangularZone TreeRow: Area=0.05; Slope=0; Length=100; Width=5
        LocalMicroClimate
        MicroClimate: same as Moora.WindbreakSystem.TreeRow.MicroClimate
        Report
          VariableNames:
            [Clock].Today
            [Zone].Area
            Distance
            Radn
            [LocalMicroClimate].Radn
            [TreeProxy].Shade
        Report DailyReport: EventNames=[Clock].DoReport
          VariableNames:
            [Clock].Today as Date
            Distance
            LocalMicroClimate.Wind
            sum([Soil].NO3N) as TotalNO3N
            sum([Soil].NH4N) as TotalNH4N
            sum([TreeProxy].WaterUptake) as WaterUptake
            sum([Soil].SoilWater.SWmm[1:5]) as SW90cm
            [TreeProxy].Urel
            [TreeProxy].H
            [TreeProxy].SWDemand
            [TreeProxy].heightToday
            [MicroClimate].peta
            [MicroClimate].petr
            [Soil].SoilWater.Eo
            [TreeProxy].WaterStress
            [Soil].SoilWater.SW[1] as SurfaceSW
            [Wheat].AboveGround.Wt as BiomassWt
            [Wheat].Grain.Wt as GrainWt
            [Soil].SoilWater.Es as Es
            [Soil].SoilWater.ESW as ESW
            [Soil].SoilWater.Eo as Eo
        Fertiliser
        SurfaceOrganicMatter: same as Moora.WindbreakSystem.TreeRow.SurfaceOrganicMatter
        Soil: ASCOrder=Vertosol; ASCSubOrder=Grey; SoilType=Clay; Site=Warra; NearestTown=Warra, Q, 4411; Region=Darling Downs and Granite Belt; State=Queensland; Country=Australia; NaturalVegetation=Brigalow scrub; ApsoilNumber=19; Latitude=-26.897; Longitude=150.909; LocationAccuracy=+/- 20m; DataSource=0; Comments=CSIRO Sustainable Ecosystems, Toowoomba
          Water
            Thickness  BD    AirDry  LL15  DUL   SAT   KS
            50         1.39  0.06    0.18  0.4   0.45  20
            100        1.39  0.1     0.18  0.4   0.45  20
            150        1.35  0.17    0.19  0.41  0.46  20
            300        1.35  0.17    0.19  0.41  0.46  20
            300        1.43  0.17    0.2   0.38  0.43  20
            300        1.44  0.17    0.23  0.38  0.43  20
            300        1.45  0.17    0.25  0.37  0.42  20
          SoilWater: residueinterception=0; SummerDate=1-Nov; SummerU=6; SummerCona=3.5; WinterDate=1-Apr; WinterU=6; WinterCona=3.5; DiffusConst=40; DiffusSlope=16; Salb=0.12; CN2Bare=73; CNRed=20; CNCov=0.8; max_pond=0; Thickness=[150, 150, 300, 300, 300, 300]; SWCON=[0.3, 0.3, 0.3, 0.3, 0.3, 0.3]
          SoilNitrogen: fom_type=[default, manure, mucuna, lablab, shemp, stable]; fract_carb=[0.2, 0.3, 0.54, 0.57, 0.45, 0]; fract_cell=[0.7, 0.3, 0.37, 0.37, 0.47, 0.1]; fract_lign=[0.1, 0.4, 0.09, 0.06, 0.08, 0.9]; wfpsN2N2O_x=[22, 88]; wfpsN2N2O_y=[0.1, 1]
          SoilOrganicMatter: same as Moora.WindbreakSystem.TreeRow.Soil.SoilOrganicMatter
          Analysis: Thickness=[150, 150, 300, 300, 300, 300]; PH=[8, 8, 8, 8, 8, 8]; PHUnits=Water; BoronUnits=HotWater
          Sample InitialN: NO3Units=ppm; NH4Units=ppm; SWUnits=Volumetric; OCUnits=Total; PHUnits=Water
            Thickness  NO3  NH4
            150        1    0.1
            150        1    0.1
            300        1    0.1
            300        1    0.1
            300        1    0.1
            300        1    0.1
          Fertiliser
          Sample: NO3Units=ppm; NH4Units=ppm; SWUnits=Volumetric; OCUnits=Total; PHUnits=Water
            Thickness  NO3  NH4  SW
            50         1    0.1  0.2
            100        1    0.1  0.3
            150        1    0.1  0.29
            300        1    0.1  0.28
            300        1    0.1  0.26
            300        1    0.1  0.26
            300        1    0.1  0.29
      RectangularZone 5m: Area=0.05; Slope=0; Length=100; Width=5
        LocalMicroClimate
        MicroClimate: same as Moora.WindbreakSystem.TreeRow.MicroClimate
        Report HarvestReport: EventNames=[Wheat].Harvesting
          VariableNames:
            [Clock].Today
            [Zone].Area
            Distance
            [Wheat].AboveGround.Wt as BiomassWt
            [Wheat].Grain.Wt as GrainWt
            [Wheat].Grain.Size as GrainSize
            [Wheat].Grain.GrainNo as GrainNumber
        Report DailyReport: same as Warra.WindbreakSystem.TreeRow.DailyReport
        Fertiliser
        SurfaceOrganicMatter: same as Moora.WindbreakSystem.TreeRow.SurfaceOrganicMatter
        Soil: ASCOrder=Vertosol; ASCSubOrder=Grey; SoilType=Clay; Site=Warra; NearestTown=Warra, Q, 4411; Region=Darling Downs and Granite Belt; State=Queensland; Country=Australia; NaturalVegetation=Brigalow scrub; ApsoilNumber=19; Latitude=-26.897; Longitude=150.909; LocationAccuracy=+/- 20m; DataSource=0; Comments=CSIRO Sustainable Ecosystems, Toowoomba
          Water
            Thickness  BD    AirDry  LL15  DUL   SAT
            50         1.39  0.06    0.18  0.4   0.45
            100        1.39  0.1     0.18  0.4   0.45
            150        1.35  0.17    0.19  0.41  0.46
            300        1.35  0.17    0.19  0.41  0.46
            300        1.43  0.17    0.2   0.38  0.43
            300        1.44  0.17    0.23  0.38  0.43
            300        1.45  0.17    0.25  0.37  0.42
            SoilCrop WheatSoil: LL=[0.18, 0.18, 0.19, 0.19, 0.2, 0.23, 0.25]; KL=[0.06, 0.06, 0.06, 0.06, 0.06, 0.06, 0.06]; XF=[1, 1, 1, 1, 1, 1, 1]
          SoilWater: same as Warra.WindbreakSystem.TreeRow.Soil.SoilWater
          SoilNitrogen: fom_type=[default, manure, mucuna, lablab, shemp, stable]; fract_carb=[0.2, 0.3, 0.54, 0.57, 0.45, 0]; fract_cell=[0.7, 0.3, 0.37, 0.37, 0.47, 0.1]; fract_lign=[0.1, 0.4, 0.09, 0.06, 0.08, 0.9]; wfpsN2N2O_x=[22, 88]; wfpsN2N2O_y=[0.1, 1]
          SoilOrganicMatter: same as Moora.WindbreakSystem.TreeRow.Soil.SoilOrganicMatter
          Analysis: Thickness=[150, 150, 300, 300, 300, 300]; PH=[8, 8, 8, 8, 8, 8]; PHUnits=Water; BoronUnits=HotWater
          Sample: NO3Units=ppm; NH4Units=ppm; SWUnits=Volumetric; OCUnits=Total; PHUnits=Water
            Thickness  NO3  NH4  SW
            50         1    0.1  0.2
            100        1    0.1  0.25
            150        1    0.1  0.3
            300        1    0.1  0.3
            300        1    0.1  0.31
            300        1    0.1  0.3
            300        1    0.1  0.3
        Plant15 Wheat: AutoHarvest=true; CropType=Wheat
      RectangularZone 10m: Area=0.05; Slope=0; Length=100; Width=5
        LocalMicroClimate
        MicroClimate: same as Moora.WindbreakSystem.TreeRow.MicroClimate
        Report HarvestReport: EventNames=[Wheat].Harvesting
          VariableNames:
            [Clock].Today
            [Zone].Area
            Distance
            [Wheat].AboveGround.Wt as BiomassWt
            [Wheat].Grain.Wt as GrainWt
            [Wheat].Grain.Size as GrainSize
            [Wheat].Grain.GrainNo as GrainNumber
        Report DailyReport: same as Warra.WindbreakSystem.TreeRow.DailyReport
        Fertiliser
        SurfaceOrganicMatter: same as Moora.WindbreakSystem.TreeRow.SurfaceOrganicMatter
        Soil: ASCOrder=Vertosol; ASCSubOrder=Grey; SoilType=Clay; Site=Warra; NearestTown=Warra, Q, 4411; Region=Darling Downs and Granite Belt; State=Queensland; Country=Australia; NaturalVegetation=Brigalow scrub; ApsoilNumber=19; Latitude=-26.897; Longitude=150.909; LocationAccuracy=+/- 20m; DataSource=0; Comments=CSIRO Sustainable Ecosystems, Toowoomba
          Water: same as Warra.WindbreakSystem.5m.Soil.Water
          SoilWater: same as Warra.WindbreakSystem.TreeRow.Soil.SoilWater
          SoilNitrogen: fom_type=[default, manure, mucuna, lablab, shemp, stable]; fract_carb=[0.2, 0.3, 0.54, 0.57, 0.45, 0]; fract_cell=[0.7, 0.3, 0.37, 0.37, 0.47, 0.1]; fract_lign=[0.1, 0.4, 0.09, 0.06, 0.08, 0.9]; wfpsN2N2O_x=[22, 88]; wfpsN2N2O_y=[0.1, 1]
          SoilOrganicMatter: same as Moora.WindbreakSystem.TreeRow.Soil.SoilOrganicMatter
          Analysis: Thickness=[150, 150, 300, 300, 300, 300]; PH=[8, 8, 8, 8, 8, 8]; PHUnits=Water; BoronUnits=HotWater
          Sample: NO3Units=ppm; NH4Units=ppm; SWUnits=Volumetric; OCUnits=Total; PHUnits=Water
            Thickness  NO3  NH4  SW
            50         1    0.1  0.2
            100        1    0.1  0.3
            150        1    0.1  0.35
            300        1    0.1  0.33
            300        1    0.1  0.3
            300        1    0.1  0.26
            300        1    0.1  0.29
        Plant15 Wheat: AutoHarvest=true; CropType=Wheat
      RectangularZone 15m: Area=0.05; Slope=0; Length=100; Width=5
        LocalMicroClimate
        MicroClimate: same as Moora.WindbreakSystem.TreeRow.MicroClimate
        Report HarvestReport: EventNames=[Wheat].Harvesting
          VariableNames:
            [Clock].Today
            [Zone].Area
            Distance
            [Wheat].AboveGround.Wt as BiomassWt
            [Wheat].Grain.Wt as GrainWt
            [Wheat].Grain.Size as GrainSize
            [Wheat].Grain.GrainNo as GrainNumber
        Report DailyReport: same as Warra.WindbreakSystem.TreeRow.DailyReport
        Fertiliser
        SurfaceOrganicMatter: same as Moora.WindbreakSystem.TreeRow.SurfaceOrganicMatter
        Soil: ASCOrder=Vertosol; ASCSubOrder=Grey; SoilType=Clay; Site=Warra; NearestTown=Warra, Q, 4411; Region=Darling Downs and Granite Belt; State=Queensland; Country=Australia; NaturalVegetation=Brigalow scrub; ApsoilNumber=19; Latitude=-26.897; Longitude=150.909; LocationAccuracy=+/- 20m; DataSource=0; Comments=CSIRO Sustainable Ecosystems, Toowoomba
          Water: same as Warra.WindbreakSystem.5m.Soil.Water
          SoilWater: same as Warra.WindbreakSystem.TreeRow.Soil.SoilWater
          SoilNitrogen: fom_type=[default, manure, mucuna, lablab, shemp, stable]; fract_carb=[0.2, 0.3, 0.54, 0.57, 0.45, 0]; fract_cell=[0.7, 0.3, 0.37, 0.37, 0.47, 0.1]; fract_lign=[0.1, 0.4, 0.09, 0.06, 0.08, 0.9]; wfpsN2N2O_x=[22, 88]; wfpsN2N2O_y=[0.1, 1]
          SoilOrganicMatter: same as Moora.WindbreakSystem.TreeRow.Soil.SoilOrganicMatter
          Analysis: Thickness=[150, 150, 300, 300, 300, 300]; PH=[8, 8, 8, 8, 8, 8]; PHUnits=Water; BoronUnits=HotWater
          Sample: NO3Units=ppm; NH4Units=ppm; SWUnits=Volumetric; OCUnits=Total; PHUnits=Water
            Thickness  NO3  NH4  SW
            50         1    0.1  0.2
            100        1    0.1  0.32
            150        1    0.1  0.34
            300        1    0.1  0.35
            300        1    0.1  0.38
            300        1    0.1  0.34
            300        1    0.1  0.32
        Plant15 Wheat: AutoHarvest=true; CropType=Wheat
      RectangularZone 20m: Area=0.1; Slope=0; Length=100; Width=10
        LocalMicroClimate
        MicroClimate: same as Moora.WindbreakSystem.TreeRow.MicroClimate
        Report HarvestReport: EventNames=[Wheat].Harvesting
          VariableNames:
            [Clock].Today
            [Zone].Area
            Distance
            [Wheat].AboveGround.Wt as BiomassWt
            [Wheat].Grain.Wt as GrainWt
            [Wheat].Grain.Size as GrainSize
            [Wheat].Grain.GrainNo as GrainNumber
        Report DailyReport: same as Warra.WindbreakSystem.TreeRow.DailyReport
        Fertiliser
        SurfaceOrganicMatter: same as Moora.WindbreakSystem.TreeRow.SurfaceOrganicMatter
        Soil: ASCOrder=Vertosol; ASCSubOrder=Grey; SoilType=Clay; Site=Warra; NearestTown=Warra, Q, 4411; Region=Darling Downs and Granite Belt; State=Queensland; Country=Australia; NaturalVegetation=Brigalow scrub; ApsoilNumber=19; Latitude=-26.897; Longitude=150.909; LocationAccuracy=+/- 20m; DataSource=0; Comments=CSIRO Sustainable Ecosystems, Toowoomba
          Water: same as Warra.WindbreakSystem.5m.Soil.Water
          SoilWater: same as Warra.WindbreakSystem.TreeRow.Soil.SoilWater
          SoilNitrogen: fom_type=[default, manure, mucuna, lablab, shemp, stable]; fract_carb=[0.2, 0.3, 0.54, 0.57, 0.45, 0]; fract_cell=[0.7, 0.3, 0.37, 0.37, 0.47, 0.1]; fract_lign=[0.1, 0.4, 0.09, 0.06, 0.08, 0.9]; wfpsN2N2O_x=[22, 88]; wfpsN2N2O_y=[0.1, 1]
          SoilOrganicMatter: same as Moora.WindbreakSystem.TreeRow.Soil.SoilOrganicMatter
          Analysis: Thickness=[150, 150, 300, 300, 300, 300]; PH=[8, 8, 8, 8, 8, 8]; PHUnits=Water; BoronUnits=HotWater
          Sample: NO3Units=ppm; NH4Units=ppm; SWUnits=Volumetric; OCUnits=Total; PHUnits=Water
            Thickness  NO3  NH4  SW
            50         1    0.1  0.32
            100        1    0.1  0.32
            150        1    0.1  0.39
            300        1    0.1  0.39
            300        1    0.1  0.38
            300        1    0.1  0.36
            300        1    0.1  0.35
        Plant15 Wheat: AutoHarvest=true; CropType=Wheat
      RectangularZone 30m: Area=0.05; Slope=0; Length=100; Width=5
        LocalMicroClimate
        MicroClimate: same as Moora.WindbreakSystem.TreeRow.MicroClimate
        Report HarvestReport: EventNames=[Wheat].Harvesting
          VariableNames:
            [Clock].Today
            [Zone].Area
            Distance
            [Wheat].AboveGround.Wt as BiomassWt
            [Wheat].Grain.Wt as GrainWt
            [Wheat].Grain.Size as GrainSize
            [Wheat].Grain.GrainNo as GrainNumber
        Report DailyReport: same as Warra.WindbreakSystem.TreeRow.DailyReport
        Fertiliser
        SurfaceOrganicMatter: same as Moora.WindbreakSystem.TreeRow.SurfaceOrganicMatter
        Soil: ASCOrder=Vertosol; ASCSubOrder=Grey; SoilType=Clay; Site=Warra; NearestTown=Warra, Q, 4411; Region=Darling Downs and Granite Belt; State=Queensland; Country=Australia; NaturalVegetation=Brigalow scrub; ApsoilNumber=19; Latitude=-26.897; Longitude=150.909; LocationAccuracy=+/- 20m; DataSource=0; Comments=CSIRO Sustainable Ecosystems, Toowoomba
          Water: same as Warra.WindbreakSystem.5m.Soil.Water
          SoilWater: same as Warra.WindbreakSystem.TreeRow.Soil.SoilWater
          SoilNitrogen: fom_type=[default, manure, mucuna, lablab, shemp, stable]; fract_carb=[0.2, 0.3, 0.54, 0.57, 0.45, 0]; fract_cell=[0.7, 0.3, 0.37, 0.37, 0.47, 0.1]; fract_lign=[0.1, 0.4, 0.09, 0.06, 0.08, 0.9]; wfpsN2N2O_x=[22, 88]; wfpsN2N2O_y=[0.1, 1]
          SoilOrganicMatter: same as Moora.WindbreakSystem.TreeRow.Soil.SoilOrganicMatter
          Analysis: Thickness=[150, 150, 300, 300, 300, 300]; PH=[8, 8, 8, 8, 8, 8]; PHUnits=Water; BoronUnits=HotWater
          Sample: NO3Units=ppm; NH4Units=ppm; SWUnits=Volumetric; OCUnits=Total; PHUnits=Water
            Thickness  NO3  NH4  SW
            50         1    0.1  0.32
            100        1    0.1  0.32
            150        1    0.1  0.38
            300        1    0.1  0.38
            300        1    0.1  0.38
            300        1    0.1  0.36
            300        1    0.1  0.35
        Plant15 Wheat: AutoHarvest=true; CropType=Wheat
      RectangularZone 40m: Area=0.1; Slope=0; Length=100; Width=10
        LocalMicroClimate
        MicroClimate: same as Moora.WindbreakSystem.TreeRow.MicroClimate
        Report HarvestReport: EventNames=[Wheat].Harvesting
          VariableNames:
            [Clock].Today
            [Zone].Area
            Distance
            [Wheat].AboveGround.Wt as BiomassWt
            [Wheat].Grain.Wt as GrainWt
            [Wheat].Grain.Size as GrainSize
            [Wheat].Grain.GrainNo as GrainNumber
        Report DailyReport: same as Warra.WindbreakSystem.TreeRow.DailyReport
        Fertiliser
        SurfaceOrganicMatter: same as Moora.WindbreakSystem.TreeRow.SurfaceOrganicMatter
        Soil: ASCOrder=Vertosol; ASCSubOrder=Grey; SoilType=Clay; Site=Warra; NearestTown=Warra, Q, 4411; Region=Darling Downs and Granite Belt; State=Queensland; Country=Australia; NaturalVegetation=Brigalow scrub; ApsoilNumber=19; Latitude=-26.897; Longitude=150.909; LocationAccuracy=+/- 20m; DataSource=0; Comments=CSIRO Sustainable Ecosystems, Toowoomba
          Water: same as Warra.WindbreakSystem.5m.Soil.Water
          SoilWater: same as Warra.WindbreakSystem.TreeRow.Soil.SoilWater
          SoilNitrogen: fom_type=[default, manure, mucuna, lablab, shemp, stable]; fract_carb=[0.2, 0.3, 0.54, 0.57, 0.45, 0]; fract_cell=[0.7, 0.3, 0.37, 0.37, 0.47, 0.1]; fract_lign=[0.1, 0.4, 0.09, 0.06, 0.08, 0.9]; wfpsN2N2O_x=[22, 88]; wfpsN2N2O_y=[0.1, 1]
          SoilOrganicMatter: same as Moora.WindbreakSystem.TreeRow.Soil.SoilOrganicMatter
          Analysis: Thickness=[150, 150, 300, 300, 300, 300]; PH=[8, 8, 8, 8, 8, 8]; PHUnits=Water; BoronUnits=HotWater
          Sample: NO3Units=ppm; NH4Units=ppm; SWUnits=Volumetric; OCUnits=Total; PHUnits=Water
            Thickness  NO3  NH4  SW
            50         1    0.1  0.32
            100        1    0.1  0.32
            150        1    0.1  0.34
            300        1    0.1  0.35
            300        1    0.1  0.38
            300        1    0.1  0.34
            300        1    0.1  0.32
        Plant15 Wheat: AutoHarvest=true; CropType=Wheat
      RectangularZone 50m: same as Warra.WindbreakSystem.40m
  Folder Machakos
    Memo
      This test evaluates performance of the APSIM AgroforestrySystem model in simulating crop and soil water data of [odhiambo1999tree;odhiambo2001roots;wilson1998comparison]. The experiment was conducted at ICRAF’s field station at Machakos, Kenya (1<sup>o</sup> 33’S and 37<sup>o</sup> 8’E) at a mean elevation of 1660 m. Bimodal annual rainfall averages 740 mm.

      Treatments were Gliricidia-maize, Grevillea-maize and sole maize. Grevillea and Gliricidia were planted in October 1993 as a single row in the middle of each 20 m x 18 m plot (1 m within-row spacing). Tree rows were oriented east-west to minimize shading effects on crops. Grevillea was pruned to 2.5. m height, but Gliricidia, which was grown as a hedgerow, was heavily cut back before each rainy season. Maize (‘Katumani composite’ ) was sown at the start of each ‘long’ season (March-July), and beans at the start of each ‘short’ season (October-February). Results were reported for two ‘long’ seasons 1996-1997, but beans failed during the intervening ‘short’ season. Tree heights during 1996-1997 were approximately 5-7 m for Grevillea and 4-5 m for Gliricidia.

      This experiment should not be confused with the CIRUS experiment reported by [Howard1997;lott2009understorey] and intervening papers and reports, but it was conducted at the same research station and over-lapped temporally.  This experiment was funded by DFID (Project T01065s5) led by Prof. Chin Ong (currently, University of Nottingham, UK). Some site data, including meteorological data, were used from these sources, or from data supplied by researchers from the two studies. For example, the met file was collated mainly from data collected using a Campbell weather station managed by Nick Jackson, and supplemented with data from a Delta-T weather station managed by James Lott. These weather station data were provided by Julia Wilson (Centre for Ecology and Hydrology, Natural Environment Research Council, UK). Watch Forcing Data [Weedon2011] interpolated data helped fill some data gaps.

      Soils are well-drained dark brown sandy clays. These soils are weakly to moderately leached with a pH of 6 to 6.5 and possess medium base saturation (50 to 80%) in the topsoil. Nitrogen and phosphorus contents were considered less than optimal, but like other nutrients, adequate for growth [mathuva1998improving].

      At the beginning of each wet season, 1 to 2 m deep trenches (depending on depth to bedrock) were dug at the margins of each plot to stop roots from one plot penetrating into and exploiting adjacent plots. All cultivations were by hand tools, which mimiced farmer practise and caused minimal disturbance to tree roots. Similarly, each season, weeds were controlled by cutting/uprooting them with hand tools on two occasions after crop germination. Key measurements reported include transects from the tree row out to 8 maize rows for: soil water, tree and crop root length density, tree growth, and maize germination, biomass and grain yield. Maize germination and growth was severely limited by low rainfall and tree competition for water.

      NOTE: Germination failure was an important factor in determining yield impacts of trees within this trial. The Maize model was not able to simulate changes in plant population density away from the tree row, but instead it was specifically coded into the model for this case. Also, we do not simulate the intervening bean crop between the two maize seasons. We add fertiliser to the second crop to provide N that would have been provided by the bean crop.
    Simulation Grevillea: Area=0; Slope=0
      Clock: StartDate=1996-03-01; EndDate=1997-12-31
      Summary SummaryFile
      Weather: FileName=Machakos1992-1998 PS151007.met
      SoilArbitrator Soil Arbitrator
      AgroforestrySystem WindbreakSystem: Area=0.017; Slope=0; RainfallInterceptionFraction=0; RainShaddowWidth=0
        Report TreeReport: EventNames=[Clock].DoReport
          VariableNames:
            [Clock].Today
            [TreeProxy].heightToday
            [TreeProxy].LeafAreaToday
            [TreeProxy].CanopyWidthToday
            [TreeProxy].IndividualTreeWaterUptake
        TreeProxy: RootRadius=0.02; NumberOfTrees=20; Kd=1E-07; BaseKL=0.05; KValue=0; NDemands=[0, 0, 0, 0, 0, 0, 0, 0, 0, 0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]; CanopyWidths=[2, 2, 2, 2, 2, 2, 2, 2, 2, 2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]; TreeLeafAreas=[2, 2, 2, 2, 2, 2, 2, 2, 2, 2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]
          Table=[[Parameter, 0, 0.5h, 1h, 1.5h, 2h, 2.5h, 3h, 4h, 5h, 6h], [Shade (%), Root Length Density (cm/cm3), Depth (cm), 0-20, 20-40, 40-60, 60-80, 80-100, 100-120, 120-140, 140-160], [50, , , 1.6, 1.2, 1.2, .5, .4, .3, .2, .2], [25, , , .4, .5, .4, .3, .2, .1, .1, .1], [0, , , .4, .2, .1, .1, 0, 0, 0, 0], [0, , , .4, .2, .1, .1, 0, 0, 0, 0], [0, , , 0, 0, 0, 0, 0, 0, 0, 0], [0, , , 0, 0, 0, 0, 0, 0, 0, 0], [0, , , 0, 0, 0, 0, 0, 0, 0, 0], [0, , , 0, 0, 0, 0, 0, 0, 0, 0], [0, , , 0, 0, 0, 0, 0, 0, 0, 0], [0, , , 0, 0, 0, 0, 0, 0, 0, 0]]
          dates=[1993-12-15, 1994-01-15, 1994-02-15, 1994-03-15, 1994-04-15, 1994-05-15, 1994-06-15, 1994-07-15, 1994-08-15, 1994-09-15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]
          heights=[921.532, 1164.66, 1332.5, 1613.06, 1912.55, 2268.62, 2567.99, 2641.61, 2621.22, 2713.55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]
        RectangularZone TreeRow: Area=0.001; Slope=0; Length=20; Width=0.5
          LocalMicroClimate
          MicroClimate: same as Moora.WindbreakSystem.TreeRow.MicroClimate
          Report
            VariableNames:
              [Clock].Today
              [Zone].Area
              Distance
              Radn
              [LocalMicroClimate].Radn
              [TreeProxy].Shade
          Report DailyReport: EventNames=[Clock].DoReport
            VariableNames:
              [Clock].Today as Date
              [Clock].Today.Year as Year
              Distance
              LocalMicroClimate.Wind
              [Soil].SoilWater.Es
              sum([Soil].NO3N) as TotalNO3N
              sum([Soil].NH4N) as TotalNH4N
              sum([TreeProxy].WaterUptake) as WaterUptake
              sum([Soil].SoilWater.SWmm[1:4]) as SW90cm
              [Soil].SoilWater.SW[2] as SW35cm
              [Soil].SoilWater.SW[3] as SW55cm
              [Soil].SoilWater.SW[4] as SW75cm
              [TreeProxy].Urel
              [TreeProxy].H
              [TreeProxy].SWDemand
              [TreeProxy].heightToday
              [MicroClimate].peta
              [MicroClimate].petr
              [Soil].SoilWater.Eo
              [TreeProxy].WaterStress
              [Soil].SoilWater.SW[1] as SurfaceSW
              [Maize].Leaf.Fw
              [Maize].Leaf.Photosynthesis.FVPD.Value
              [Maize].Leaf.Photosynthesis.FT.Value
              [Maize].Leaf.Fn
              [Maize].Root.Depth
              [Maize].Grain.Live.Wt as GrainWt
          Fertiliser
          SurfaceOrganicMatter: same as Moora.WindbreakSystem.TreeRow.SurfaceOrganicMatter
          Soil MachakosSoil: Site=ICRAF Machakos Research Station; NearestTown=Machakos; Country=Kenya; Latitude=-1.55; Longitude=37.13
            Water
              Thickness  BD    AirDry  LL15   DUL   SAT
              200        1.35  0.04    0.1    0.2   0.35
              200        1.35  0.14    0.1    0.2   0.35
              200        1.35  0.14    0.14   0.29  0.37
              200        1.4   0.15    0.174  0.29  0.37
              200        1.4   0.16    0.174  0.29  0.38
              200        1.4   0.16    0.174  0.29  0.38
              200        1.4   0.16    0.174  0.29  0.38
              200        1.4   0.16    0.174  0.29  0.38
              SoilCrop MaizeSoil: LL=[0.1, 0.1, 0.14, 0.174, 0.17, 0.17, 0.17, 0.17]; KL=[0.08, 0.08, 0.08, 0.08, 0.06, 0.04, 0.03, 0.02]; XF=[1, 1, 1, 1, 1, 1, 1, 1]
            SoilWater: residueinterception=0; SummerDate=1-Nov; SummerU=9; SummerCona=2.5; WinterDate=1-Apr; WinterU=9; WinterCona=2.5; DiffusConst=88; DiffusSlope=35.4; Salb=0.13; CN2Bare=65; CNRed=20; CNCov=0.8; max_pond=0; Thickness=[200, 1400]; SWCON=[0.5, 0.5]
            SoilNitrogen: fom_type=[default, manure, mucuna, lablab, shemp, stable]; fract_carb=[0.2, 0.3, 0.54, 0.57, 0.45, 0]; fract_cell=[0.7, 0.3, 0.37, 0.37, 0.47, 0.1]; fract_lign=[0.1, 0.4, 0.09, 0.06, 0.08, 0.9]; wfpsN2N2O_x=[22, 88]; wfpsN2N2O_y=[0.1, 1]
            SoilOrganicMatter: same as Replacements.MachakosSoil.SoilOrganicMatter
            Analysis: Thickness=[200, 200, 200, 200, 200, 200, 200, 200]; PH=[6.5, 6.5, 6.5, 6.5, 6.5, 6.5, 6.5, 6.5]; PHUnits=Water; BoronUnits=HotWater
            Sample: NO3Units=ppm; NH4Units=ppm; SWUnits=Volumetric; OCUnits=Total; PHUnits=Water
              Thickness  NO3  NH4  SW
              200        10   10   0.1
              200        5    5    0.1
              200        2    2    0.14
              200        1    1    0.15
              200        0.5  0.5  0.16
              200        0.5  0.5  0.16
              200        0.5  0.5  0.16
              200        0.5  0.5  0.16
        RectangularZone 1m: Area=0.002; Slope=0; Length=20; Width=1
          LocalMicroClimate
          MicroClimate: same as Moora.WindbreakSystem.TreeRow.MicroClimate
          Operations
            1996-03-13  [Maize].Sow(population:0.21, cultivar: "Katumani", depth: 30, rowSpacing: 1000);
            1996-03-13  [Fertiliser].Apply(Amount: 0, Type: Fertiliser.Types.NO3N)
            1997-03-01  [SurfaceOrganicMatter].Add(mass: 0, N: 30, P:0,type: "cowpea", name: "cowpea");
            1997-04-02  [Maize].Sow(population: 0.21, cultivar: "Katumani", depth: 30, rowSpacing: 1000);
            1997-04-02  [Fertiliser].Apply(Amount: 60, Type: Fertiliser.Types.NO3N)
          Report HarvestReport: EventNames=[Maize].Harvesting
            VariableNames:
              [Clock].Today
              [Clock].Today.Year as Year
              [Zone].Area
              Distance
              [Maize].Phenology.CurrentStageName as Stage
              [Maize].Grain.Live.Wt as GrainWt
              [Maize].Stem.Live.Wt
              [Maize].EarLive.Wt
              [Maize].Leaf.Live.Wt
              [Maize].Root.Live.Wt
              [Maize].Husk.Live.Wt
              [Maize].Rachis.Live.Wt
              [Maize].EarLive.N
              [Maize].Grain.Live.N
              [Maize].Stem.Live.N
              [Maize].Leaf.Live.N
              [Maize].Root.Live.N
              [Maize].Root.Depth
              [Maize].AboveGround.N
              [Maize].AboveGround.Wt as Biomass
              [Maize].Total.N
              [Maize].Total.Wt
              max of [Maize].Leaf.LAI from [Maize].Sowing to [Maize].Harvesting as LAImax
              [Maize].Grain.NumberFunction.Value as GPSM
              [Maize].Grain.Size as GrainSize
              [Maize].Population
              [Maize].Phenology.FloweringDAS.Value as FloweringDAS
          Report DailyReport: same as Machakos.Grevillea.WindbreakSystem.TreeRow.DailyReport
          Fertiliser
          SurfaceOrganicMatter: same as Moora.WindbreakSystem.TreeRow.SurfaceOrganicMatter
          Plant Maize: CropType=Maize
          Manager Harvesting
```csharp
using System;
using Models.Core;
using System.Collections.Generic;
using System.Text;
using Models.Soils;
using Models.PMF;
using Models;
using System.Xml.Serialization;
using APSIM.Shared.Utilities;

namespace Models
{
	[Serializable] 
	public class Script : Model
	{
		[Link] Plant Maize;
		[Link] Zone zone;
					
        
		[EventSubscribe("Commencing")]
		private void OnSimulationCommencing(object sender, EventArgs e)
		{
		}
		
		[EventSubscribe("DoManagement")]
		private void OnDoManagement(object sender, EventArgs e)
		{
			if (Maize.Phenology.CurrentPhaseName == "ReadyForHarvesting")
			{
				Maize.Harvest();
				Maize.EndCrop();
			}
		}
		
		[EventSubscribe("DoManagementCalculations")]
		private void OnDoManagementCalculations(object sender, EventArgs e)
		{
			
		}
	}
}
```
          Soil MachakosSoil: Site=ICRAF Machakos Research Station; NearestTown=Machakos; Country=Kenya; Latitude=-1.55; Longitude=37.13
            Water
              Thickness  BD    AirDry  LL15  DUL   SAT
              200        1.35  0.04    0.1   0.2   0.35
              200        1.35  0.14    0.1   0.2   0.35
              200        1.35  0.14    0.14  0.29  0.37
              200        1.4   0.15    0.15  0.29  0.37
              200        1.4   0.16    0.16  0.29  0.38
              200        1.4   0.16    0.16  0.29  0.38
              200        1.4   0.16    0.16  0.29  0.38
              200        1.4   0.16    0.16  0.29  0.38
              SoilCrop MaizeSoil: LL=[0.1, 0.1, 0.14, 0.15, 0.16, 0.16, 0.16, 0.16]; KL=[0.08, 0.08, 0.08, 0.08, 0.06, 0.04, 0.03, 0.02]; XF=[1, 1, 1, 1, 1, 1, 1, 1]
            SoilWater: same as Machakos.Grevillea.WindbreakSystem.TreeRow.MachakosSoil.SoilWater
            SoilNitrogen: fom_type=[default, manure, mucuna, lablab, shemp, stable]; fract_carb=[0.2, 0.3, 0.54, 0.57, 0.45, 0]; fract_cell=[0.7, 0.3, 0.37, 0.37, 0.47, 0.1]; fract_lign=[0.1, 0.4, 0.09, 0.06, 0.08, 0.9]; wfpsN2N2O_x=[22, 88]; wfpsN2N2O_y=[0.1, 1]
            SoilOrganicMatter: same as Replacements.MachakosSoil.SoilOrganicMatter
            Analysis: Thickness=[200, 200, 200, 200, 200, 200, 200, 200]; PH=[6.5, 6.5, 6.5, 6.5, 6.5, 6.5, 6.5, 6.5]; PHUnits=Water; BoronUnits=HotWater
            Sample: same as Machakos.Grevillea.WindbreakSystem.TreeRow.MachakosSoil.Sample
        RectangularZone 2m: Area=0.002; Slope=0; Length=20; Width=1
          LocalMicroClimate
          MicroClimate: same as Moora.WindbreakSystem.TreeRow.MicroClimate
          Operations
            1996-03-13  [Maize].Sow(population:0.58, cultivar: "Katumani", depth: 30, rowSpacing: 1000);
            1996-03-13  [Fertiliser].Apply(Amount: 0, Type: Fertiliser.Types.NO3N)
            1997-03-01  [SurfaceOrganicMatter].Add(mass: 0, N: 30, P:0,type: "cowpea", name: "cowpea");
            1997-04-02  [Maize].Sow(population: 0.58, cultivar: "Katumani", depth: 30, rowSpacing: 1000);
            1997-04-02  [Fertiliser].Apply(Amount: 60, Type: Fertiliser.Types.NO3N)
          Report HarvestReport: same as Machakos.Grevillea.WindbreakSystem.1m.HarvestReport
          Report DailyReport: same as Machakos.Grevillea.WindbreakSystem.TreeRow.DailyReport
          Fertiliser
          SurfaceOrganicMatter: same as Moora.WindbreakSystem.TreeRow.SurfaceOrganicMatter
          Plant Maize: CropType=Maize
          Manager Harvesting
            script: same as in Machakos.Grevillea.WindbreakSystem.1m.Harvesting
          Soil MachakosSoil: Site=ICRAF Machakos Research Station; NearestTown=Machakos; Country=Kenya; Latitude=-1.55; Longitude=37.13
            Water
              Thickness  BD    AirDry  LL15  DUL   SAT
              200        1.35  0.04    0.1   0.2   0.35
              200        1.35  0.14    0.1   0.2   0.35
              200        1.35  0.14    0.14  0.29  0.37
              200        1.4   0.15    0.17  0.29  0.37
              200        1.4   0.16    0.17  0.29  0.38
              200        1.4   0.16    0.17  0.29  0.38
              200        1.4   0.16    0.17  0.29  0.38
              200        1.4   0.16    0.17  0.29  0.38
              SoilCrop MaizeSoil: LL=[0.1, 0.1, 0.14, 0.17, 0.17, 0.17, 0.17, 0.17]; KL=[0.08, 0.08, 0.08, 0.08, 0.06, 0.04, 0.03, 0.02]; XF=[1, 1, 1, 1, 1, 1, 1, 1]
            SoilWater: same as Machakos.Grevillea.WindbreakSystem.TreeRow.MachakosSoil.SoilWater
            SoilNitrogen: fom_type=[default, manure, mucuna, lablab, shemp, stable]; fract_carb=[0.2, 0.3, 0.54, 0.57, 0.45, 0]; fract_cell=[0.7, 0.3, 0.37, 0.37, 0.47, 0.1]; fract_lign=[0.1, 0.4, 0.09, 0.06, 0.08, 0.9]; wfpsN2N2O_x=[22, 88]; wfpsN2N2O_y=[0.1, 1]
            SoilOrganicMatter: same as Replacements.MachakosSoil.SoilOrganicMatter
            Analysis: Thickness=[200, 200, 200, 200, 200, 200, 200, 200]; PH=[6.5, 6.5, 6.5, 6.5, 6.5, 6.5, 6.5, 6.5]; PHUnits=Water; BoronUnits=HotWater
            Sample: NO3Units=ppm; NH4Units=ppm; SWUnits=Volumetric; OCUnits=Total; PHUnits=Water
              Thickness  NO3  NH4  SW
              200        10   10   0.1
              200        5    5    0.1
              200        2    2    0.14
              200        1    1    0.17
              200        0.5  0.5  0.17
              200        0.5  0.5  0.17
              200        0.5  0.5  0.17
              200        0.5  0.5  0.17
        RectangularZone 3m: Area=0.002; Slope=0; Length=20; Width=1
          LocalMicroClimate
          MicroClimate: same as Moora.WindbreakSystem.TreeRow.MicroClimate
          Operations
            1996-03-13  [Maize].Sow(population: 1.45, cultivar: "Katumani", depth: 30, rowSpacing: 1000);
            1996-03-13  [Fertiliser].Apply(Amount: 0, Type: Fertiliser.Types.NO3N)
            1997-03-01  [SurfaceOrganicMatter].Add(mass: 0, N: 30, P:0,type: "cowpea", name: "cowpea");
            1997-04-02  [Maize].Sow(population: 1.45, cultivar: "Katumani", depth: 30, rowSpacing: 1000);
            1997-04-02  [Fertiliser].Apply(Amount: 60, Type: Fertiliser.Types.NO3N)
          Report HarvestReport: same as Machakos.Grevillea.WindbreakSystem.1m.HarvestReport
          Report DailyReport: same as Machakos.Grevillea.WindbreakSystem.TreeRow.DailyReport
          Fertiliser
          SurfaceOrganicMatter: same as Moora.WindbreakSystem.TreeRow.SurfaceOrganicMatter
          Plant Maize: CropType=Maize
          Manager Harvesting: same as Machakos.Grevillea.WindbreakSystem.1m.Harvesting
          Soil MachakosSoil: same as Machakos.Grevillea.WindbreakSystem.1m.MachakosSoil
        RectangularZone 4m: Area=0.002; Slope=0; Length=20; Width=1
          LocalMicroClimate
          MicroClimate: same as Moora.WindbreakSystem.TreeRow.MicroClimate
          Operations
            1996-03-13  [Maize].Sow(population: 2.1, cultivar: "Katumani", depth: 30, rowSpacing: 1000);
            1996-03-13  [Fertiliser].Apply(Amount: 0, Type: Fertiliser.Types.NO3N)
            1997-03-01  [SurfaceOrganicMatter].Add(mass: 0, N: 30, P:0,type: "cowpea", name: "cowpea");
            1997-04-02  [Maize].Sow(population: 2.1, cultivar: "Katumani", depth: 30, rowSpacing: 1000);
            1997-04-02  [Fertiliser].Apply(Amount: 60, Type: Fertiliser.Types.NO3N)
          Report HarvestReport: same as Machakos.Grevillea.WindbreakSystem.1m.HarvestReport
          Report DailyReport: same as Machakos.Grevillea.WindbreakSystem.TreeRow.DailyReport
          Fertiliser
          SurfaceOrganicMatter: same as Moora.WindbreakSystem.TreeRow.SurfaceOrganicMatter
          Plant Maize: CropType=Maize
          Manager Harvesting: same as Machakos.Grevillea.WindbreakSystem.1m.Harvesting
          Soil MachakosSoil: same as Machakos.Grevillea.WindbreakSystem.1m.MachakosSoil
        RectangularZone 5m: Area=0.002; Slope=0; Length=20; Width=1
          LocalMicroClimate
          MicroClimate: same as Moora.WindbreakSystem.TreeRow.MicroClimate
          Operations
            1996-03-13  [Maize].Sow(population: 2.29, cultivar: "Katumani", depth: 30, rowSpacing: 1000);
            1996-03-13  [Fertiliser].Apply(Amount: 0, Type: Fertiliser.Types.NO3N)
            1997-03-01  [SurfaceOrganicMatter].Add(mass: 0, N: 30, P:0,type: "cowpea", name: "cowpea");
            1997-04-02  [Maize].Sow(population: 2.29, cultivar: "Katumani", depth: 30, rowSpacing: 1000);
            1997-04-02  [Fertiliser].Apply(Amount: 60, Type: Fertiliser.Types.NO3N)
          Report HarvestReport: same as Machakos.Grevillea.WindbreakSystem.1m.HarvestReport
          Report DailyReport: same as Machakos.Grevillea.WindbreakSystem.TreeRow.DailyReport
          Fertiliser
          SurfaceOrganicMatter: same as Moora.WindbreakSystem.TreeRow.SurfaceOrganicMatter
          Plant Maize: CropType=Maize
          Manager Harvesting: same as Machakos.Grevillea.WindbreakSystem.1m.Harvesting
          Soil MachakosSoil: same as Machakos.Grevillea.WindbreakSystem.1m.MachakosSoil
        RectangularZone 6m: Area=0.002; Slope=0; Length=20; Width=1
          LocalMicroClimate
          MicroClimate: same as Moora.WindbreakSystem.TreeRow.MicroClimate
          Operations
            1996-03-13  [Maize].Sow(population: 2.56, cultivar: "Katumani", depth: 30, rowSpacing: 1000);
            1996-03-13  [Fertiliser].Apply(Amount: 0, Type: Fertiliser.Types.NO3N)
            1997-03-01  [SurfaceOrganicMatter].Add(mass: 0, N: 30, P:0,type: "cowpea", name: "cowpea");
            1997-04-02  [Maize].Sow(population: 2.56, cultivar: "Katumani", depth: 30, rowSpacing: 1000);
            1997-04-02  [Fertiliser].Apply(Amount: 60, Type: Fertiliser.Types.NO3N)
          Report HarvestReport: same as Machakos.Grevillea.WindbreakSystem.1m.HarvestReport
          Report DailyReport: same as Machakos.Grevillea.WindbreakSystem.TreeRow.DailyReport
          Fertiliser
          SurfaceOrganicMatter: same as Moora.WindbreakSystem.TreeRow.SurfaceOrganicMatter
          Plant Maize: CropType=Maize
          Manager Harvesting: same as Machakos.Grevillea.WindbreakSystem.1m.Harvesting
          Soil MachakosSoil: same as Machakos.Grevillea.WindbreakSystem.1m.MachakosSoil
        RectangularZone 7m: Area=0.002; Slope=0; Length=20; Width=1
          LocalMicroClimate
          MicroClimate: same as Moora.WindbreakSystem.TreeRow.MicroClimate
          Operations
            1996-03-13  [Maize].Sow(population: 2.8, cultivar: "Katumani", depth: 30, rowSpacing: 1000);
            1996-03-13  [Fertiliser].Apply(Amount: 0, Type: Fertiliser.Types.NO3N)
            1997-03-01  [SurfaceOrganicMatter].Add(mass: 0, N: 30, P:0,type: "cowpea", name: "cowpea");
            1997-04-02  [Maize].Sow(population: 2.8, cultivar: "Katumani", depth: 30, rowSpacing: 1000);
            1997-04-02  [Fertiliser].Apply(Amount: 60, Type: Fertiliser.Types.NO3N)
          Report HarvestReport: same as Machakos.Grevillea.WindbreakSystem.1m.HarvestReport
          Report DailyReport: same as Machakos.Grevillea.WindbreakSystem.TreeRow.DailyReport
          Fertiliser
          SurfaceOrganicMatter: same as Moora.WindbreakSystem.TreeRow.SurfaceOrganicMatter
          Plant Maize: CropType=Maize
          Manager Harvesting: same as Machakos.Grevillea.WindbreakSystem.1m.Harvesting
          Soil MachakosSoil: same as Machakos.Grevillea.WindbreakSystem.1m.MachakosSoil
        RectangularZone 8m: Area=0.002; Slope=0; Length=20; Width=1
          LocalMicroClimate
          MicroClimate: same as Moora.WindbreakSystem.TreeRow.MicroClimate
          Operations
            1996-03-13  [Maize].Sow(population: 2.8, cultivar: "Katumani", depth: 30, rowSpacing: 1000);
            1996-03-13  [Fertiliser].Apply(Amount: 0, Type: Fertiliser.Types.NO3N)
            1997-02-01  [SurfaceOrganicMatter].Add(mass: 0, N: 30, P:0,type: "cowpea", name: "cowpea");
            1997-04-02  [Maize].Sow(population: 2.8, cultivar: "Katumani", depth: 30, rowSpacing: 1000);
            1997-04-02  [Fertiliser].Apply(Amount: 60, Type: Fertiliser.Types.NO3N)
          Report HarvestReport: same as Machakos.Grevillea.WindbreakSystem.1m.HarvestReport
          Report DailyReport: EventNames=[Clock].DoReport
            VariableNames:
              [Clock].Today as Date
              [Clock].Today.Year as Year
              Distance
              LocalMicroClimate.Wind
              [Soil].SoilWater.Es
              sum([Soil].NO3N) as TotalNO3N
              sum([Soil].NH4N) as TotalNH4N
              sum([TreeProxy].WaterUptake) as WaterUptake
              sum([Soil].SoilWater.SWmm[1:4]) as SW90cm
              [Soil].SoilWater.SW[2] as SW35cm
              [Soil].SoilWater.SW[3] as SW55cm
              [Soil].SoilWater.SW[4] as SW75cm
              [TreeProxy].Urel
              [TreeProxy].H
              [TreeProxy].SWDemand
              [TreeProxy].heightToday
              [MicroClimate].peta
              [MicroClimate].petr
              [Soil].SoilWater.Eo
              [TreeProxy].WaterStress
              [Soil].SoilWater.SW[1] as SurfaceSW
              [Maize].Leaf.Fw
              [Maize].Leaf.Photosynthesis.FVPD.Value
              [Maize].Leaf.Photosynthesis.FT.Value
              [Maize].Leaf.Fn
              [Maize].Root.Depth
              [Maize].Grain.Live.Wt as GrainWt
              [Maize].Leaf.LAI
              [Maize].Phenology.CurrentStageName as Stage
              [Maize].Grain.Live.Wt as GrainWt
              [Maize].Stem.Live.Wt
              [Maize].EarLive.Wt
              [Maize].Leaf.Live.Wt
              [Maize].Root.Live.Wt
              [Maize].Husk.Live.Wt
              [Maize].Rachis.Live.Wt
              [Maize].EarLive.N
              [Maize].Grain.Live.N
              [Maize].Stem.Live.N
              [Maize].Leaf.Live.N
              [Maize].Root.Live.N
              [Maize].Root.Depth
              [Maize].AboveGround.N
              [Maize].AboveGround.Wt as Biomass
              [Maize].Total.N
              [Maize].Total.Wt
              max of [Maize].Leaf.LAI from [Maize].Sowing to [Maize].Harvesting as LAImax
              [Maize].Grain.NumberFunction.Value as GPSM
              [Maize].Grain.Size as GrainSize
              [Maize].Population
              [Maize].Phenology.FloweringDAS.Value as FloweringDAS
              [Maize].Rachis.CobNumber.Value
              [Maize].Rachis.Live.Wt
              [Maize].Rachis.CobSize.Value
              [SurfaceOrganicMatter].Wt
          Fertiliser
          SurfaceOrganicMatter: same as Moora.WindbreakSystem.TreeRow.SurfaceOrganicMatter
          Plant Maize: CropType=Maize
          Manager Harvesting: same as Machakos.Grevillea.WindbreakSystem.1m.Harvesting
          Soil MachakosSoil: same as Machakos.Grevillea.WindbreakSystem.1m.MachakosSoil
    Simulation Gliricidia: Area=0; Slope=0
      Clock: StartDate=1996-03-01; EndDate=1997-12-31
      Summary SummaryFile
      Weather: FileName=Machakos1992-1998 PS151007.met
      SoilArbitrator Soil Arbitrator
      AgroforestrySystem WindbreakSystem: Area=0.017; Slope=0; RainfallInterceptionFraction=0; RainShaddowWidth=0
        Report TreeReport: EventNames=[Clock].DoReport
          VariableNames:
            [Clock].Today
            [TreeProxy].heightToday
            [TreeProxy].LeafAreaToday
            [TreeProxy].CanopyWidthToday
        TreeProxy: RootRadius=0.02; NumberOfTrees=0; Kd=1E-07; BaseKL=0.05; KValue=0; CanopyWidths=[2, 2, 2, 2, 2, 2, 2, 2, 2, 2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]; TreeLeafAreas=[2, 2, 2, 2, 2, 2, 2, 2, 2, 2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]
          Table=[[Parameter, 0, 0.5h, 1h, 1.5h, 2h, 2.5h, 3h, 4h, 5h, 6h], [Shade (%), Root Length Density (cm/cm3), Depth (cm), 0-20, 20-40, 40-60, 60-80, 80-100, 100-120, 120-140, 140-160], [50, , , 2, 2.5, 1.6, .5, .5, .5, .5, .5], [25, , , .9, 1, .9, .6, .6, .6, .6, .6], [0, , , .5, .4, .3, .3, .3, .2, .2, .2], [0, , , .4, .3, .2, .1, 0, 0, 0, 0], [0, , , .3, .2, .1, .1, 0, 0, 0, 0], [0, , , 0, 0, 0, 0, 0, 0, 0, 0], [0, , , 0, 0, 0, 0, 0, 0, 0, 0], [0, , , 0, 0, 0, 0, 0, 0, 0, 0], [0, , , 0, 0, 0, 0, 0, 0, 0, 0], [0, , , 0, 0, 0, 0, 0, 0, 0, 0]]
          dates=[1993-12-15, 1994-01-15, 1994-02-15, 1994-03-15, 1994-04-15, 1994-05-15, 1994-06-15, 1994-07-15, 1994-08-15, 1994-09-15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]
          heights=[865.064, 1070.66, 1295.08, 1537.99, 1931.48, 2155.9, 2304.36, 2378.09, 2376.41, 2450.14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]
          NDemands=[0.1, 0.1, 0.1, 0.1, 0.1, 0.1, 0.1, 0.1, 0.1, 0.1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]
        RectangularZone TreeRow: Area=0.001; Slope=0; Length=20; Width=0.5
          LocalMicroClimate
          MicroClimate: same as Moora.WindbreakSystem.TreeRow.MicroClimate
          Report
            VariableNames:
              [Clock].Today
              [Zone].Area
              Distance
              Radn
              [LocalMicroClimate].Radn
              [TreeProxy].Shade
          Report DailyReport: EventNames=[Clock].DoReport
            VariableNames:
              [Clock].Today as Date
              Distance
              LocalMicroClimate.Wind
              [Soil].SoilWater.Es
              sum([Soil].NO3N) as TotalNO3N
              sum([Soil].NH4N) as TotalNH4N
              sum([TreeProxy].WaterUptake) as WaterUptake
              sum([Soil].SoilWater.SWmm[1:4]) as SW90cm
              [Soil].SoilWater.SW[2] as SW35cm
              [Soil].SoilWater.SW[3] as SW55cm
              [Soil].SoilWater.SW[4] as SW75cm
              [TreeProxy].Urel
              [TreeProxy].H
              [TreeProxy].SWDemand
              [TreeProxy].heightToday
              [MicroClimate].peta
              [MicroClimate].petr
              [Soil].SoilWater.Eo
              [TreeProxy].WaterStress
              [Soil].SoilWater.SW[1] as SurfaceSW
              [Maize].Leaf.Fw
              [Maize].Leaf.Photosynthesis.FVPD.Value
              [Maize].Leaf.Photosynthesis.FT.Value
              [Maize].Leaf.Fn
              [Maize].Root.Depth
              [Maize].Grain.Live.Wt as GrainWt
          Fertiliser
          SurfaceOrganicMatter: same as Moora.WindbreakSystem.TreeRow.SurfaceOrganicMatter
          Soil MachakosSoil: same as Machakos.Grevillea.WindbreakSystem.TreeRow.MachakosSoil
        RectangularZone 1m: Area=0.002; Slope=0; Length=20; Width=1
          LocalMicroClimate
          MicroClimate: same as Moora.WindbreakSystem.TreeRow.MicroClimate
          Operations
            1996-03-13  [Maize].Sow(population: 0.21, cultivar: "Katumani", depth: 30, rowSpacing: 1000);
            1996-03-13  [Fertiliser].Apply(Amount: 0, Type: Fertiliser.Types.NO3N)
            1997-04-02  [Maize].Sow(population: 0.21, cultivar: "Katumani", depth: 30, rowSpacing: 1000);
            1997-04-02  [Fertiliser].Apply(Amount: 60, Type: Fertiliser.Types.NO3N)
          Report HarvestReport: same as Machakos.Grevillea.WindbreakSystem.1m.HarvestReport
          Report DailyReport: same as Machakos.Gliricidia.WindbreakSystem.TreeRow.DailyReport
          Fertiliser
          SurfaceOrganicMatter: same as Moora.WindbreakSystem.TreeRow.SurfaceOrganicMatter
          Plant Maize: CropType=Maize
          Manager Harvesting: same as Machakos.Grevillea.WindbreakSystem.1m.Harvesting
          Soil MachakosSoil: same as Machakos.Grevillea.WindbreakSystem.1m.MachakosSoil
        RectangularZone 2m: Area=0.002; Slope=0; Length=20; Width=1
          LocalMicroClimate
          MicroClimate: same as Moora.WindbreakSystem.TreeRow.MicroClimate
          Operations
            1996-03-13  [Maize].Sow(population: 0.3, cultivar: "Katumani", depth: 30, rowSpacing: 1000);
            1996-03-13  [Fertiliser].Apply(Amount: 0, Type: Fertiliser.Types.NO3N)
            1997-04-02  [Maize].Sow(population: 0.3, cultivar: "Katumani", depth: 30, rowSpacing: 1000);
            1997-04-02  [Fertiliser].Apply(Amount: 60, Type: Fertiliser.Types.NO3N)
          Report HarvestReport: same as Machakos.Grevillea.WindbreakSystem.1m.HarvestReport
          Report DailyReport: same as Machakos.Gliricidia.WindbreakSystem.TreeRow.DailyReport
          Fertiliser
          SurfaceOrganicMatter: same as Moora.WindbreakSystem.TreeRow.SurfaceOrganicMatter
          Plant Maize: CropType=Maize
          Manager Harvesting: same as Machakos.Grevillea.WindbreakSystem.2m.Harvesting
          Soil MachakosSoil: same as Machakos.Grevillea.WindbreakSystem.2m.MachakosSoil
        RectangularZone 3m: Area=0.002; Slope=0; Length=20; Width=1
          LocalMicroClimate
          MicroClimate: same as Moora.WindbreakSystem.TreeRow.MicroClimate
          Operations
            1996-03-13  [Maize].Sow(population: 1.0, cultivar: "Katumani", depth: 30, rowSpacing: 1000);
            1996-03-13  [Fertiliser].Apply(Amount: 0, Type: Fertiliser.Types.NO3N)
            1997-04-02  [Maize].Sow(population: 1.0, cultivar: "Katumani", depth: 30, rowSpacing: 1000);
            1997-04-02  [Fertiliser].Apply(Amount: 60, Type: Fertiliser.Types.NO3N)
          Report HarvestReport: same as Machakos.Grevillea.WindbreakSystem.1m.HarvestReport
          Report DailyReport: same as Machakos.Gliricidia.WindbreakSystem.TreeRow.DailyReport
          Fertiliser
          SurfaceOrganicMatter: same as Moora.WindbreakSystem.TreeRow.SurfaceOrganicMatter
          Plant Maize: CropType=Maize
          Manager Harvesting: same as Machakos.Grevillea.WindbreakSystem.1m.Harvesting
          Soil MachakosSoil: same as Machakos.Grevillea.WindbreakSystem.1m.MachakosSoil
        RectangularZone 4m: Area=0.002; Slope=0; Length=20; Width=1
          LocalMicroClimate
          MicroClimate: same as Moora.WindbreakSystem.TreeRow.MicroClimate
          Operations
            1996-03-13  [Maize].Sow(population: 1.83, cultivar: "Katumani", depth: 30, rowSpacing: 1000);
            1996-03-13  [Fertiliser].Apply(Amount: 0, Type: Fertiliser.Types.NO3N)
            1997-04-02  [Maize].Sow(population: 1.83, cultivar: "Katumani", depth: 30, rowSpacing: 1000);
            1997-04-02  [Fertiliser].Apply(Amount: 60, Type: Fertiliser.Types.NO3N)
          Report HarvestReport: same as Machakos.Grevillea.WindbreakSystem.1m.HarvestReport
          Report DailyReport: same as Machakos.Gliricidia.WindbreakSystem.TreeRow.DailyReport
          Fertiliser
          SurfaceOrganicMatter: same as Moora.WindbreakSystem.TreeRow.SurfaceOrganicMatter
          Plant Maize: CropType=Maize
          Manager Harvesting: same as Machakos.Grevillea.WindbreakSystem.1m.Harvesting
          Soil MachakosSoil: same as Machakos.Grevillea.WindbreakSystem.1m.MachakosSoil
        RectangularZone 5m: Area=0.002; Slope=0; Length=20; Width=1
          LocalMicroClimate
          MicroClimate: same as Moora.WindbreakSystem.TreeRow.MicroClimate
          Operations
            1996-03-13  [Maize].Sow(population: 2.29, cultivar: "Katumani", depth: 30, rowSpacing: 1000);
            1996-03-13  [Fertiliser].Apply(Amount: 0, Type: Fertiliser.Types.NO3N)
            1997-04-02  [Maize].Sow(population: 2.29, cultivar: "Katumani", depth: 30, rowSpacing: 1000);
            1997-04-02  [Fertiliser].Apply(Amount: 60, Type: Fertiliser.Types.NO3N)
          Report HarvestReport: same as Machakos.Grevillea.WindbreakSystem.1m.HarvestReport
          Report DailyReport: same as Machakos.Gliricidia.WindbreakSystem.TreeRow.DailyReport
          Fertiliser
          SurfaceOrganicMatter: same as Moora.WindbreakSystem.TreeRow.SurfaceOrganicMatter
          Plant Maize: CropType=Maize
          Manager Harvesting: same as Machakos.Grevillea.WindbreakSystem.1m.Harvesting
          Soil MachakosSoil: same as Machakos.Grevillea.WindbreakSystem.1m.MachakosSoil
        RectangularZone 6m: Area=0.002; Slope=0; Length=20; Width=1
          LocalMicroClimate
          MicroClimate: same as Moora.WindbreakSystem.TreeRow.MicroClimate
          Operations
            1996-03-13  [Maize].Sow(population: 2.62, cultivar: "Katumani", depth: 30, rowSpacing: 1000);
            1996-03-13  [Fertiliser].Apply(Amount: 0, Type: Fertiliser.Types.NO3N)
            1997-04-02  [Maize].Sow(population: 2.62, cultivar: "Katumani", depth: 30, rowSpacing: 1000);
            1997-04-02  [Fertiliser].Apply(Amount: 60, Type: Fertiliser.Types.NO3N)
          Report HarvestReport: same as Machakos.Grevillea.WindbreakSystem.1m.HarvestReport
          Report DailyReport: same as Machakos.Gliricidia.WindbreakSystem.TreeRow.DailyReport
          Fertiliser
          SurfaceOrganicMatter: same as Moora.WindbreakSystem.TreeRow.SurfaceOrganicMatter
          Plant Maize: CropType=Maize
          Manager Harvesting: same as Machakos.Grevillea.WindbreakSystem.1m.Harvesting
          Soil MachakosSoil: same as Machakos.Grevillea.WindbreakSystem.1m.MachakosSoil
        RectangularZone 7m: Area=0.002; Slope=0; Length=20; Width=1
          LocalMicroClimate
          MicroClimate: same as Moora.WindbreakSystem.TreeRow.MicroClimate
          Operations
            1996-03-13  [Maize].Sow(population: 2.8, cultivar: "Katumani", depth: 30, rowSpacing: 1000);
            1996-03-13  [Fertiliser].Apply(Amount: 0, Type: Fertiliser.Types.NO3N)
            1997-04-02  [Maize].Sow(population: 2.8, cultivar: "Katumani", depth: 30, rowSpacing: 1000);
            1997-04-02  [Fertiliser].Apply(Amount: 60, Type: Fertiliser.Types.NO3N)
          Report HarvestReport: same as Machakos.Grevillea.WindbreakSystem.1m.HarvestReport
          Report DailyReport: same as Machakos.Gliricidia.WindbreakSystem.TreeRow.DailyReport
          Fertiliser
          SurfaceOrganicMatter: same as Moora.WindbreakSystem.TreeRow.SurfaceOrganicMatter
          Plant Maize: CropType=Maize
          Manager Harvesting: same as Machakos.Grevillea.WindbreakSystem.1m.Harvesting
          Soil MachakosSoil: same as Machakos.Grevillea.WindbreakSystem.1m.MachakosSoil
        RectangularZone 8m: Area=0.002; Slope=0; Length=20; Width=1
          LocalMicroClimate
          MicroClimate: same as Moora.WindbreakSystem.TreeRow.MicroClimate
          Operations: same as Machakos.Gliricidia.WindbreakSystem.7m.Operations
          Report HarvestReport: same as Machakos.Grevillea.WindbreakSystem.1m.HarvestReport
          Report DailyReport: same as Machakos.Gliricidia.WindbreakSystem.TreeRow.DailyReport
          Fertiliser
          SurfaceOrganicMatter: same as Moora.WindbreakSystem.TreeRow.SurfaceOrganicMatter
          Plant Maize: CropType=Maize
          Manager Harvesting: same as Machakos.Grevillea.WindbreakSystem.1m.Harvesting
          Soil MachakosSoil: Site=ICRAF Machakos Research Station; NearestTown=Machakos; Country=Kenya; Latitude=-1.55; Longitude=37.13
            Water: same as Machakos.Grevillea.WindbreakSystem.1m.MachakosSoil.Water
            SoilWater: same as Machakos.Grevillea.WindbreakSystem.TreeRow.MachakosSoil.SoilWater
            SoilNitrogen: fom_type=[default, manure, mucuna, lablab, shemp, stable]; fract_carb=[0.2, 0.3, 0.54, 0.57, 0.45, 0]; fract_cell=[0.7, 0.3, 0.37, 0.37, 0.47, 0.1]; fract_lign=[0.1, 0.4, 0.09, 0.06, 0.08, 0.9]; wfpsN2N2O_x=[22, 88]; wfpsN2N2O_y=[0.1, 1]
            SoilOrganicMatter: same as Replacements.MachakosSoil.SoilOrganicMatter
            Analysis: Thickness=[200, 200, 200, 200, 200, 200, 200, 200]; PH=[6.5, 6.5, 6.5, 6.5, 6.5, 6.5, 6.5, 6.5]; PHUnits=Water; BoronUnits=HotWater
            Sample: NO3Units=ppm; NH4Units=ppm; SWUnits=Volumetric; OCUnits=Total; PHUnits=Water
              Thickness  NO3  NH4  SW
              200        5    0.1  0.1
              200        2    0.1  0.1
              200        2    0.1  0.14
              200        1    0.1  0.15
              200        0.5  0.1  0.16
              200        0.5  0.1  0.16
              200        0.5  0.1  0.16
              200        0.5  0.1  0.16
    Memo Memo re SW
      NOTE: Soil water data were obtained from digitising graphs of the measured data from the technical report for the trial [wilson1998comparison].  As such, exact dates for observations are not known and error in estimates of measurement dates will cause problems in the following graphs.  For example, where observations occur close to rainfall events.
  Folder Sensibility Test
    Memo
      Yield data from cereal and pulse crops [Bennell2008] have been collected from windbreak sites through the eastern agricultural districts of South Australia using a harvester equipped with a yield monitor. The yield response in the sheltered benefit zone was +3.7% for cereal yield averaged across zones (2.2H–9.7H) outside the competition zone. They found, for wheat, that the average width of expression of the competition zone to be 2 tree heights (2H) with a 4% increase in yields within the sheltered zone (2H-11H).

      This sensibility test assumes a tree windbreak with a of height of 10 m. The competition zone should therefore be evident out to 20m from the trees with only a marginal increase in yield at 20-110 m from the trees.
    Simulation South Australia: Area=0; Slope=0
      Clock: StartDate=2000-01-01; EndDate=2010-12-31
      Summary SummaryFile
      Weather: FileName=Roseworthy.met
      SoilArbitrator Soil Arbitrator
      AgroforestrySystem WindbreakSystem: Area=2.05; Slope=0; RainfallInterceptionFraction=0; RainShaddowWidth=0
        Manager SowingRule
          StartDate = 15-may
          EndDate = 24-jun
          MinESW = 30
          ESWZoneName = 50m
          MinRain = 25
          RainDays = 7
          CultivarName = h45
          SowingDepth = 30
          RowSpacing = 250
          Population = 120
          Amount = 60
          CropName = wheat
```csharp
using System;
using System.Collections.Generic;
using Models.Core;
using Models.Agroforestry;
using Models.PMF.OldPlant;
using Models.Soils;
using Models.Utilities;
using Models.Zones;
using APSIM.Shared.Utilities;

namespace Models
{
	[Serializable]
	public class Script : Model
	{
		[Link] Clock Clock;
		[Link] Summary Summary;
		Accumulator accumulatedRain;
		
		[Description("Start of sowing window (d-mmm)")]
		public string StartDate { get; set; }
		[Description("End of sowing window (d-mmm)")]
		public string EndDate { get; set; }
		[Description("Minimum extractable soil water for sowing (mm)")]
		public double MinESW { get; set; }
		[Description("Name of Zone to use for minimum ESW condition")]
		public string ESWZoneName { get; set; }
		[Description("Accumulated rainfall required for sowing (mm)")]
		public double MinRain { get; set; }
		[Description("Duration of rainfall accumulation (d)")]
		public int RainDays { get; set; }
		[Description("Cultivar to be sown")]
		public string CultivarName { get; set; }
		[Description("Sowing depth (mm)")]
		public double SowingDepth { get; set; }
		[Description("Row spacing (mm)")]
		public double RowSpacing { get; set; }
		[Description("Plant population (/m2)")]
		public double Population { get; set; }
		[Description("Amount of fertiliser to be applied (kg/ha)")]
		public double Amount { get; set; }
		[Description("Crop to be fertilised")]
		public string CropName { get; set; }
		
		private Zone ESWZone;
		private List<IModel> Zones;
		private Plant15 Wheat;
		private Soil Soil;
		
		[EventSubscribe("Commencing")]
		private void OnSimulationCommencing(object sender, EventArgs e)
		{
			Zones = Apsim.FindAll(this, typeof(RectangularZone));
			foreach (Model m in Zones)
			{
				if (m.Name == ESWZoneName)
				{
					ESWZone = m as Zone;
					break;
				}
			}
			accumulatedRain = new Accumulator(this, "[Weather].Rain", RainDays);
		}
		
		[EventSubscribe("DoManagement")]
		private void OnDoManagement(object sender, EventArgs e)
		{		
			accumulatedRain.Update();
			
			Soil ESWSoil = Apsim.Find(ESWZone, typeof(Soil)) as Soil;
			
			foreach (Zone z in Zones)
			{
				Wheat = Apsim.Find(z, typeof(Plant15)) as Plant15;	
				Soil = Apsim.Find(z, typeof(Soil)) as Soil;
						
				if (Wheat != null && DateUtilities.WithinDates(StartDate, Clock.Today, EndDate) &&
				    Wheat.plant_status == "out" &&
				    ESWSoil.SoilWater.ESW >= MinESW &&
				    accumulatedRain.Sum >= MinRain)
				{
					Wheat.Sow(population: Population, cultivar: CultivarName, depth: SowingDepth, rowSpacing: RowSpacing);
					Fertiliser Fertiliser = Apsim.Find(Wheat.Parent, typeof(Fertiliser)) as Fertiliser;
					Fertiliser.Apply(Amount: Amount, Type: Fertiliser.Types.NO3N);
				}
			}
		}
	}
}
```
        TreeProxy: RootRadius=0.02; NumberOfTrees=0; Kd=1E-07; BaseKL=0.01; KValue=0; heights=[10000, 10000, 10000, 10000, 10000]; NDemands=[0.1, 0.1, 0.1, 0.1, 0.1]; CanopyWidths=[0.1, 0.1, 0.1, 0.1, 0.1]; TreeLeafAreas=[0.1, 0.1, 0.1, 0.1, 0.1]
          Table=[[Parameter, 0, 0.5h, 1h, 1.5h, 2h, 2.5h, 3h, 4h, 5h, 6h], [Shade (%), Root Length Density (cm/cm3), Depth (cm), 0-15, 15-30, 30-60, 60-90, 90-120, 120-150], [80, , , 3, 2, 1, .5, .1, .1], [0, , , 2, 1, .5, .5, .1, .1], [0, , , 1, .5, .2, .1, .1, 0], [0, , , .1, .1, .1, .1, .05, 0], [0, , , .02, .02, .02, .01, 0, 0], [0, , , .01, .01, 0, 0, 0, 0], [0, , , .01, .01, 0, 0, 0, 0], [0, , , 0, 0, 0, 0, 0, 0], [0, , , 0, 0, 0, 0, 0, 0], [0, , , 0, 0, 0, 0, 0, 0]]
          dates=[1900-01-01, 1900-03-01, 1900-06-01, 1900-09-01, 1900-12-31]
        RectangularZone TreeRow: Area=0.05; Slope=0; Length=100; Width=5
          LocalMicroClimate
          MicroClimate: same as Moora.WindbreakSystem.TreeRow.MicroClimate
          Report
            VariableNames:
              [Clock].Today
              [Zone].Area
              Distance
              Radn
              [LocalMicroClimate].Radn
              [TreeProxy].Shade
          Report DailyReport: EventNames=[Clock].DoReport
            VariableNames:
              [Clock].Today
              Distance
              LocalMicroClimate.Wind
              sum([Soil].NO3N) as TotalNO3N
              sum([Soil].NH4N) as TotalNH4N
              sum([TreeProxy].WaterUptake) as WaterUptake
              sum([Soil].SoilWater.SWmm[1:4]) as SW90cm
              [TreeProxy].Urel
              [TreeProxy].H
              [TreeProxy].SWDemand
              [TreeProxy].heightToday
              [MicroClimate].peta
              [MicroClimate].petr
              [Soil].SoilWater.Eo
              [TreeProxy].WaterStress
              [Soil].SoilWater.SW[1] as SurfaceSW
          Fertiliser
          SurfaceOrganicMatter: same as Moora.WindbreakSystem.TreeRow.SurfaceOrganicMatter
          Soil: SoilType=Clay; Site=Wolseley; NearestTown=Wolseley; Region=Upper South East; State=South Australia; Country=Australia; ApsoilNumber=344; Latitude=-36.389; Longitude=140.899; DataSource=APSoil
            Comments=Chemical data based on old soil pit sites/ CLL measured for wheat 2007
            Water
              Thickness  BD    AirDry  LL15  DUL   SAT   KS
              100        1.4   0.05    0.05  0.33  0.44  20
              150        1.36  0.15    0.18  0.41  0.46  20
              250        1.33  0.21    0.21  0.42  0.47  20
              200        1.34  0.24    0.24  0.41  0.46  20
              300        1.31  0.23    0.23  0.43  0.48  20
              400        1.35  0.3     0.3   0.41  0.46  20
            SoilWater: residueinterception=0; SummerDate=1-Nov; SummerU=6; SummerCona=3.5; WinterDate=1-Apr; WinterU=6; WinterCona=3.5; DiffusConst=40; DiffusSlope=16; Salb=0.12; CN2Bare=75; CNRed=20; CNCov=0.8; max_pond=0; Thickness=[100, 150, 250, 200, 300, 400]; SWCON=[0.5, 0.5, 0.5, 0.5, 0.3, 0.3]
            SoilNitrogen: fom_type=[default, manure, mucuna, lablab, shemp, stable]; fract_carb=[0.2, 0.3, 0.54, 0.57, 0.45, 0]; fract_cell=[0.7, 0.3, 0.37, 0.37, 0.47, 0.1]; fract_lign=[0.1, 0.4, 0.09, 0.06, 0.08, 0.9]; wfpsN2N2O_x=[22, 88]; wfpsN2N2O_y=[0.1, 1]
            SoilOrganicMatter: RootCN=40; RootWt=1000; SoilCN=12; EnrACoeff=7.4; EnrBCoeff=0.2; OCUnits=Total
              Thickness  OC   FBiom  FInert
              100        1.7  0.04   0.5
              150        0.8  0.02   0.6
              250        0.3  0.02   0.8
              200        0.2  0.02   1
              300        0.2  0.01   1
              400        0.2  0.01   1
            Analysis: Thickness=[100, 150, 250, 200, 300, 400]; PH=[7.8, 7.9, 8.3, 8.3, 8.3, 8.4]; PHUnits=Water; BoronUnits=HotWater
              Texture=[Medium clay, Medium clay, Medium heavy clay, Moderately calcareous heavy clay, Moderately calcareous medium clay, Moderately calcareous medium clay]
            InitialWater: PercentMethod=FilledFromTop; FractionFull=0.33
            Sample InitialN: NO3Units=ppm; NH4Units=ppm; SWUnits=Volumetric; OCUnits=Total; PHUnits=Water
              Thickness  NO3  NH4
              150        1    0.1
              150        1    0.1
              300        1    0.1
              300        1    0.1
              300        1    0.1
              300        1    0.1
        RectangularZone 5m: Area=0.05; Slope=0; Length=100; Width=5
          LocalMicroClimate
          MicroClimate: same as Moora.WindbreakSystem.TreeRow.MicroClimate
          Report HarvestReport: EventNames=[Wheat].Harvesting
            VariableNames:
              [Clock].Today
              [Zone].Area
              Distance
              [Wheat].AboveGround.Wt as BiomassWt
              [Wheat].Grain.Wt as GrainWt
              [Wheat].Grain.Size as GrainSize
              [Wheat].Grain.GrainNo as GrainNumber
          Report DailyReport: EventNames=[Clock].DoReport
            VariableNames:
              [Clock].Today
              [Clock].Today.Year as Year
              Distance
              LocalMicroClimate.Wind
              sum([Soil].SoilWater.SWmm[1:4]) as SW90cm
              sum([Soil].NO3N) as TotalNO3N
              sum([Soil].NH4N) as TotalNH4N
              [MicroClimate].peta
              [MicroClimate].petr
              [Wheat].AboveGround.Wt as BiomassWt
              [Wheat].Grain.Wt as GrainWt
              [Soil].SoilWater.SW[1] as SurfaceSW
              [Wheat].EP
              [Wheat].WaterDemand
          Fertiliser
          SurfaceOrganicMatter: same as Moora.WindbreakSystem.TreeRow.SurfaceOrganicMatter
          Plant15 Wheat: AutoHarvest=true; CropType=Wheat
          Soil: SoilType=Clay; Site=Wolseley; NearestTown=Wolseley; Region=Upper South East; State=South Australia; Country=Australia; ApsoilNumber=344; Latitude=-36.389; Longitude=140.899; DataSource=APSoil
            Comments=Chemical data based on old soil pit sites/ CLL measured for wheat 2007
            Water
              Thickness  BD    AirDry  LL15  DUL   SAT
              100        1.4   0.05    0.05  0.33  0.44
              150        1.36  0.15    0.18  0.41  0.46
              250        1.33  0.21    0.21  0.42  0.47
              200        1.34  0.24    0.24  0.41  0.46
              300        1.31  0.23    0.23  0.43  0.48
              400        1.35  0.3     0.3   0.41  0.46
              SoilCrop WheatSoil: LL=[0.05, 0.18, 0.21, 0.24, 0.23, 0.3]; KL=[0.06, 0.06, 0.06, 0.04, 0.04, 0.02]; XF=[1, 1, 1, 1, 1, 1]
            SoilWater: same as Sensibility Test.South Australia.WindbreakSystem.TreeRow.Soil.SoilWater
            SoilNitrogen: fom_type=[default, manure, mucuna, lablab, shemp, stable]; fract_carb=[0.2, 0.3, 0.54, 0.57, 0.45, 0]; fract_cell=[0.7, 0.3, 0.37, 0.37, 0.47, 0.1]; fract_lign=[0.1, 0.4, 0.09, 0.06, 0.08, 0.9]; wfpsN2N2O_x=[22, 88]; wfpsN2N2O_y=[0.1, 1]
            SoilOrganicMatter: same as Sensibility Test.South Australia.WindbreakSystem.TreeRow.Soil.SoilOrganicMatter
            Analysis: Thickness=[100, 150, 250, 200, 300, 400]; PH=[7.8, 7.9, 8.3, 8.3, 8.3, 8.4]; PHUnits=Water; BoronUnits=HotWater
            InitialWater: PercentMethod=FilledFromTop; FractionFull=0.33
            Sample: NO3Units=ppm; NH4Units=ppm; SWUnits=Volumetric; OCUnits=Total; PHUnits=Water
              Thickness  NO3  NH4
              150        1    0.1
              150        1    0.1
              300        1    0.1
              300        1    0.1
              300        1    0.1
              300        1    0.1
        RectangularZone 10m: same as Sensibility Test.South Australia.WindbreakSystem.5m
        RectangularZone 15m: same as Sensibility Test.South Australia.WindbreakSystem.5m
        RectangularZone 20m: same as Sensibility Test.South Australia.WindbreakSystem.5m
        RectangularZone 25m: same as Sensibility Test.South Australia.WindbreakSystem.5m
        RectangularZone 30m: same as Sensibility Test.South Australia.WindbreakSystem.5m
        RectangularZone 40m: Area=0.1; Slope=0; Length=100; Width=10
          LocalMicroClimate
          MicroClimate: same as Moora.WindbreakSystem.TreeRow.MicroClimate
          Report HarvestReport: EventNames=[Wheat].Harvesting
            VariableNames:
              [Clock].Today
              [Zone].Area
              Distance
              [Wheat].AboveGround.Wt as BiomassWt
              [Wheat].Grain.Wt as GrainWt
              [Wheat].Grain.Size as GrainSize
              [Wheat].Grain.GrainNo as GrainNumber
          Report DailyReport: same as Sensibility Test.South Australia.WindbreakSystem.5m.DailyReport
          Fertiliser
          SurfaceOrganicMatter: same as Moora.WindbreakSystem.TreeRow.SurfaceOrganicMatter
          Plant15 Wheat: AutoHarvest=true; CropType=Wheat
          Soil: same as Sensibility Test.South Australia.WindbreakSystem.5m.Soil
        RectangularZone 50m: same as Sensibility Test.South Australia.WindbreakSystem.40m
        RectangularZone 75m: Area=0.25; Slope=0; Length=100; Width=25
          LocalMicroClimate
          MicroClimate: same as Moora.WindbreakSystem.TreeRow.MicroClimate
          Report HarvestReport: EventNames=[Wheat].Harvesting
            VariableNames:
              [Clock].Today
              [Zone].Area
              Distance
              [Wheat].AboveGround.Wt as BiomassWt
              [Wheat].Grain.Wt as GrainWt
              [Wheat].Grain.Size as GrainSize
              [Wheat].Grain.GrainNo as GrainNumber
          Report DailyReport: same as Sensibility Test.South Australia.WindbreakSystem.5m.DailyReport
          Fertiliser
          SurfaceOrganicMatter: same as Moora.WindbreakSystem.TreeRow.SurfaceOrganicMatter
          Plant15 Wheat: AutoHarvest=true; CropType=Wheat
          Soil: same as Sensibility Test.South Australia.WindbreakSystem.5m.Soil
        RectangularZone 100m: same as Sensibility Test.South Australia.WindbreakSystem.75m
        RectangularZone 150m: Area=0.5; Slope=0; Length=100; Width=50
          LocalMicroClimate
          MicroClimate: same as Moora.WindbreakSystem.TreeRow.MicroClimate
          Report HarvestReport: EventNames=[Wheat].Harvesting
            VariableNames:
              [Clock].Today
              [Zone].Area
              Distance
              [Wheat].AboveGround.Wt as BiomassWt
              [Wheat].Grain.Wt as GrainWt
              [Wheat].Grain.Size as GrainSize
              [Wheat].Grain.GrainNo as GrainNumber
          Report DailyReport: same as Sensibility Test.South Australia.WindbreakSystem.5m.DailyReport
          Fertiliser
          SurfaceOrganicMatter: same as Moora.WindbreakSystem.TreeRow.SurfaceOrganicMatter
          Plant15 Wheat: AutoHarvest=true; CropType=Wheat
          Soil: same as Sensibility Test.South Australia.WindbreakSystem.5m.Soil
        RectangularZone 200m: Area=0.5; Slope=0; Length=100; Width=50
          LocalMicroClimate
          Report HarvestReport: EventNames=[Wheat].Harvesting
            VariableNames:
              [Clock].Today
              [Zone].Area
              Distance
              [Wheat].AboveGround.Wt as BiomassWt
              [Wheat].Grain.Wt as GrainWt
              [Wheat].Grain.Size as GrainSize
              [Wheat].Grain.GrainNo as GrainNumber
          Report DailyReport: same as Sensibility Test.South Australia.WindbreakSystem.5m.DailyReport
          Fertiliser
          SurfaceOrganicMatter: same as Moora.WindbreakSystem.TreeRow.SurfaceOrganicMatter
          Plant15 Wheat: AutoHarvest=true; CropType=Wheat
          MicroClimate: same as Moora.WindbreakSystem.TreeRow.MicroClimate
          Soil: same as Sensibility Test.South Australia.WindbreakSystem.5m.Soil
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