Simulations: Version=1
  Replacements
    Report DailyReport: EventNames=[Clock].DoReport; ResultsPerPage=0
      VariableNames:
        [Clock].Today as Date
        Distance
        LocalMicroClimate.Wind
        [Soil].SoilWater.Es
        sum([Soil].NO3N) as TotalNO3N
        sum([Soil].NH4N) as TotalNH4N
        sum([TreeProxy].WaterUptake) as WaterUptake
        sum([Soil].SoilWater.SWmm[1:4]) as SW90cm
        [Soil].SoilWater.SW[2] as SW35cm
        [Soil].SoilWater.SW[3] as SW55cm
        [Soil].SoilWater.SW[4] as SW75cm
        [TreeProxy].Urel
        [TreeProxy].H
        [TreeProxy].SWDemand
        [TreeProxy].heightToday
        [MicroClimate].peta
        [MicroClimate].petr
        [Soil].SoilWater.Eo
        [TreeProxy].WaterStress
        [Soil].SoilWater.SW[1] as SurfaceSW
        [Maize].Leaf.Fw
        [Maize].Leaf.Photosynthesis.FVPD.Value
        [Maize].Leaf.Photosynthesis.FT.Value
        [Maize].Leaf.Fn
        [Maize].Root.Depth
    SurfaceOrganicMatter: PoolName=beanresidues; type=cowpea; mass=1000; standing_fraction=0; cnr=40; CriticalResidueWeight=2000; OptimumDecompTemp=20; MaxCumulativeEOS=20; CNRatioDecompCoeff=0.277; CNRatioDecompThreshold=25; TotalLeachRain=25; MinRainToLeach=10; CriticalMinimumOrganicC=0.004; DefaultCPRatio=0; DefaultStandingFraction=0; StandingExtinctCoeff=0.5; FractionFaecesAdded=0.5
      Pools:
        {PoolName=beanresidues, ResidueType=cowpea, Mass=1000, CNRatio=40, StandingFraction=0}
      ResidueTypes: LoadFromResource=ResidueTypes
    Plant Maize: CropType=Maize
      Memo TitlePage
        # The APSIM Maize Model

        _Brown, H.E., Teixeira, E.I., Huth, N.I. and Holzworth, D.P._

        The APSIM maize model has been developed using the Plant Modelling Framework (PMF) of [brown_plant_2014]. This new framework provides a library of plant organ and process submodels that can be coupled, at runtime, to construct a model in much the same way that models can be coupled to construct a simulation. This means that dynamic composition of lower level process and organ classes (e.g. photosynthesis, leaf) into larger constructions (e.g. maize, wheat, sorghum) can be achieved by the model developer without additional coding.
      OrganArbitrator Arbitrator: NArbitrationOption=PrioritythenRelativeAllocation; DMArbitrationOption=RelativeAllocation
      Phenology
        AirTemperatureFunction ThermalTime
          XYPairs: X=[0, 18, 26, 34, 44]; Y=[0, 10, 18, 26, 0]
        GerminatingPhase Germinating: Start=Sowing; End=Germination
        EmergingPhase Emerging: Start=Germination; End=Emergence; ShootLag=55; ShootRate=0.6
          VariableReference ThermalTime: VariableName=[Phenology].ThermalTime.Value
        GenericPhase Juvenile: Start=Emergence; End=End_Juvenile
          Constant Target: Value=200
          VariableReference ThermalTime: VariableName=[Phenology].ThermalTime.Value
        GenericPhase Photosensitive: Start=End_Juvenile; End=Floral_Initiation
          VariableReference ThermalTime: VariableName=[Phenology].ThermalTime.Value
          LinearInterpolationFunction Target: XProperty=[Phenology].Photoperiod.Value
            Memo
              The photoperiod is likely to vary with individual maize cultivars.  Therefore, the response shown here is indicative only.  See the descriptions of individual cultivars for more detail on photoperiod responses used by the maize model.
            XYPairs: X=[0, 12.5, 24]; Y=[0, 0, 10]
        LeafAppearancePhase LeafAppearance: Start=Floral_Initiation; End=Flag_Leaf
          VariableReference ThermalTime: VariableName=[Phenology].ThermalTime.Value
        GenericPhase FlagLeafToFlowering: Start=Flag_Leaf; End=Flowering
          Constant Target: Value=50
          VariableReference ThermalTime: VariableName=[Phenology].ThermalTime.Value
        GenericPhase FloweringToGrainFilling: Start=Flowering; End=StartGrainFill
          Constant Target: Value=120
          VariableReference ThermalTime: VariableName=[Phenology].ThermalTime.Value
        GenericPhase GrainFilling: Start=StartGrainFill; End=EndGrainFill
          Constant Target: Value=550
          VariableReference ThermalTime: VariableName=[Phenology].ThermalTime.Value
        GenericPhase Maturing: Start=EndGrainFill; End=Maturity
          Constant Target: Value=10
          VariableReference ThermalTime: VariableName=[Phenology].ThermalTime.Value
        GenericPhase MaturityToHarvestRipe: Start=Maturity; End=HarvestRipe
          Constant Target: Value=10
          VariableReference ThermalTime: VariableName=[Phenology].ThermalTime.Value
        EndPhase ReadyForHarvesting: Start=HarvestRipe; End=Unused
          VariableReference ThermalTime: VariableName=[Phenology].ThermalTime.Value
        PhotoperiodFunction Photoperiod: Twilight=-6
        OnEventFunction FloweringDAS: SetEvent=Flowering; ReSetEvent=never
          Memo
            A function is used to provide flowering date as days after sowing(DAS).
          Constant PreEventValue: Value=0
          VariableReference PostEventValue: VariableName=[Phenology].DaysAfterSowing
        OnEventFunction MaturityDAS: SetEvent=Maturity; ReSetEvent=never
          Memo
            A function is used to provide maturity date as days after sowing(DAS).
          Constant PreEventValue: Value=0
          VariableReference PostEventValue: VariableName=[Phenology].DaysAfterSowing
      Structure: InitialiseStage=Emergence; PrimaryBudNo=1
        Memo
          Though tillering is common in some maize varieties under certain agronomic conditions, no tillering is accounted for within this model.  Therefore all branching has been parameterised out of the current maize model.
        VariableReference ThermalTime: VariableName=[Phenology].ThermalTime.Value
        PhaseLookup MainStemPrimordiaInitiationRate
          PhaseLookupValue Plastochron: Start=Emergence; End=Floral_Initiation
            MultiplyFunction Plastochron
              VariableReference Phyllochron: VariableName=[Structure].MainStemNodeAppearanceRate.Value
              Constant LeafTipsPerPrimordia: Value=0.5
        PhaseLookup MainStemNodeAppearanceRate
          PhaseLookupValue Phyllochron: Start=Emergence; End=Flag_Leaf
            LinearInterpolationFunction Phyllochron: XProperty=[Structure].MainStemNodeNo
              XYPairs: X=[1, 3.4, 4]; Y=[30, 30, 42]
        MainStemFinalNodeNumberFunction MainStemFinalNodeNumber: MaximumMainStemNodeNumber=30
          OnEventFunction FinalLeafNumber: SetEvent=Floral_Initiation
            AddFunction PreEventValue
              Constant PrimordiaAtEmergence: Value=6
              DivideFunction PrimordiaDuringJuvenilePhase
                VariableReference JuvenilePhaseDuration: VariableName=[Phenology].Juvenile.Target.Value
                Constant ApproximatePlastochron: Value=15
            VariableReference PostEventValue: VariableName=[Structure].MainStemPrimordiaNo
        HeightFunction HeightModel
          LinearInterpolationFunction PotentialHeight: XProperty=[Phenology].Stage
            XYPairs: X=[3, 4, 5, 6]; Y=[20, 50, 60, 1700]
          LinearInterpolationFunction WaterStress: XProperty=[Maize].WaterSupplyDemandRatio
            XYPairs: X=[0.3, 1]; Y=[1, 1]
        Constant BranchingRate: Value=0
        Constant ShadeInducedBranchMortality: Value=0
        Constant DroughtInducedBranchMortality: Value=0
      ReproductiveOrgan Grain: FractionRemoved=0; FractionToResidue=0
        Constant InitialGrainProportion: Value=0.05
        Constant MaximumPotentialGrainSize: Value=0.3
        PhaseLookup DMDemandFunction
          PhaseLookupValue InitialPhase: Start=Flowering; End=StartGrainFill
            FillingRateFunction
              VariableReference GrainNumber: VariableName=[Grain].NumberFunction.Value
              VariableReference FillingDuration: VariableName=[Phenology].FloweringToGrainFilling.Target.Value
              VariableReference ThermalTime: VariableName=[Phenology].ThermalTime.Value
              MultiplyFunction PotentialSizeIncrement
                VariableReference InitialProportion: VariableName=[Grain].InitialGrainProportion.Value
                VariableReference MaximumSize: VariableName=[Grain].MaximumPotentialGrainSize.Value
          PhaseLookupValue LinearPhase: Start=StartGrainFill; End=EndGrainFill
            FillingRateFunction
              VariableReference GrainNumber: VariableName=[Grain].NumberFunction.Value
              VariableReference FillingDuration: VariableName=[Phenology].GrainFilling.Target.Value
              VariableReference ThermalTime: VariableName=[Phenology].ThermalTime.Value
              MultiplyFunction PotentialSizeIncrement
                SubtractFunction ProportionLinearPhase
                  Constant One: Value=1
                  VariableReference InitialProportion: VariableName=[Grain].InitialGrainProportion.Value
                VariableReference MaximumSize: VariableName=[Grain].MaximumPotentialGrainSize.Value
        Biomass Live
        Biomass Dead
        Constant MinimumNConc: Value=0.008
        PhaseLookup MaximumNConc
          PhaseLookupValue InitialPhase: Start=Flowering; End=StartGrainFill
            Constant InitialNconc: Value=0.05
          PhaseLookupValue LinearPhase: Start=StartGrainFill; End=EndGrainFill
            Constant FinalNconc: Value=0.013
        Constant WaterContent: Value=0.12
        PhaseLookup NFillingRate
          PhaseLookupValue GrainFilling: Start=Flowering; End=EndGrainFill
            FillingRateFunction
              VariableReference GrainNumber: VariableName=[Grain].NumberFunction.Value
              AddFunction FillingDuration
                VariableReference FloweringToGrainFilling: VariableName=[Phenology].FloweringToGrainFilling.Target.Value
                VariableReference GrainFilling: VariableName=[Phenology].GrainFilling.Target.Value
              VariableReference ThermalTime: VariableName=[Phenology].ThermalTime.Value
              MultiplyFunction PotentialSizeIncrement
                Constant MaximumFinalNConc: Value=0.013
                VariableReference MaximumSize: VariableName=[Grain].MaximumPotentialGrainSize.Value
        MultiplyFunction NumberFunction
          VariableReference CobNumber: VariableName=[Rachis].CobNumber.Value
          LinearInterpolationFunction KernalsPerCob: XProperty=[Rachis].CobSize.Value
            Memo
              The number of kernals per cob is likely to vary with individual maize cultivars.  Therefore, the relationship shown here is indicative only.  See the descriptions of individual cultivars for more detail on kernal number determination used by the maize model.
            XYPairs: X=[0, 25]; Y=[0, 550]
          Constant GrainsPerKernal: Value=1
        ExpressionFunction YieldBuPerAcre: Expression=[Grain].Live.Wt * 10 * 56 * 0.4536 * 2.471
      Root: FractionRemoved=0; FractionToResidue=0; InitialDM=0.2; SpecificRootLength=40000; KNO3_yProperty=[0, 0.03]; KNO3_xRootLength=[0, 0.003]; KNH4_yProperty=[0, 0.0003]; KNH4_xRootLength=[0, 0.003]; NuptakeSupply=0
        CompositeBiomass Live: Propertys=[[Root].LayerLive]
        CompositeBiomass Dead: Propertys=[[Root].LayerDead]
        LinearInterpolationFunction KLModifier: XProperty=[Maize].Population
          Memo
            The parameter KL is is described by Meinke et al (1993) to combine elements of soil conductivity (K) with root length (L) in determining root water uptake.  Peake et al (2013) demonstrated that in maize KL varied with plant population through impacts on root length density.  Here we adjust KL linearly with plant population.
          XYPairs: X=[0, 10]; Y=[1, 1]
        Constant SoilWaterEffect: Value=1
          Memo
            No effect of soil water content on root growth is currently captured in the model.
        Constant TemperatureEffect: Value=1
          Memo
            No effect of temperature on root growth is currently captured in the model.
        Constant MaxDailyNUptake: Value=20
          Memo
            Maximum daily N uptake is set to an arbitrarily high value.
        Constant SenescenceRate: Value=0.005
          Memo
            Jones and Kiniry (1986) used a constant root senescence fraction in the CERES-Maize model.
        Constant StructuralFraction: Value=1
        Constant MaximumNConc: Value=0.01
        Constant MinimumNConc: Value=0.01
        LinearInterpolationFunction PartitionFraction: XProperty=[Phenology].Stage
          XYPairs: X=[0, 2.99, 3, 6, 7]; Y=[0, 0, 0.2, 0.2, 0]
        PhaseLookup RootFrontVelocity
          Memo
            Hammer et al (2009) used a constant extraction front velocity of 2.5cm per day in their analysis of historical maize yield trends in the US corn belt.
          PhaseLookupValue PreFlowering: Start=Germination; End=Flowering
            Constant RootFrontVelocity: Value=25
          PhaseLookupValue PostFlowering: Start=Flowering; End=Maturity
            Constant RootFrontVelocity: Value=0
        PhaseBasedSwitch NitrogenDemandSwitch: Start=Germination; End=Maturity
      Leaf: MaxCover=1; KDead=0.03; GsMax=0.03; R50=200; Emissivity=0.96; Albido=0.26
        zero: FractionRemoved, FractionToResidue, CurrentExpandingLeaf, StartFractionExpanded, FractionNextleafExpanded, _ExpandedNodeNo, DeadNodesYesterday, FRGR, PotentialEP, FractionDied
        LeafCohort InitialLeaves[1]: Rank=1; Area=380
        LeafCohort InitialLeaves[2]: Rank=2; Area=0
        LeafCohort InitialLeaves[3]: Rank=3; Area=0
        LeafCohort InitialLeaves[4]: Rank=4; Area=0
        LeafCohort InitialLeaves[5]: Rank=5; Area=0
        LeafCohort InitialLeaves[6]: Rank=6; Area=0
        CompositeBiomass Live: Propertys=[[Leaf].CohortLive]
        CompositeBiomass Dead: Propertys=[[Leaf].CohortDead]
        ArrayBiomass CohortArrayLive: Propertys=[[Leaf].Live]; ArraySize=[Leaf].MaxNodeNo
        ArrayBiomass CohortArrayDead: Propertys=[[Leaf].Dead]; ArraySize=[Leaf].MaxNodeNo
        LeafCohortParameters CohortParameters
          BellCurveFunction MaxArea
            Memo
              Potential leaf area is calculated from leaf number using the approach of Keating and Wafula (1992).
              Individual leaf size is described using a bell-shaped curve, the parameters of which are derived from final leaf number.
            MultiplyFunction LargestLeafPosition
              VariableReference FinalLeafNumber: VariableName=[Structure].MainStemFinalNodeNumber.Value
              Constant RelativePositionOfLargestLeaf: Value=0.67
            LinearInterpolationFunction AreaMax: XProperty=[Structure].MainStemFinalNodeNumber.Value
              XYPairs: X=[1, 5, 10, 15, 20, 25]; Y=[32530, 39259, 49659, 60000, 75000, 90000]
            LinearInterpolationFunction Breadth: XProperty=[Structure].MainStemFinalNodeNumber.Value
              XYPairs: X=[5, 10, 15, 20, 25]; Y=[-0.377, -0.144, -0.059, -0.027, -0.016]
            Constant Skewness: Value=0.00025
          Constant NReallocationFactor: Value=0.1
          Constant NRetranslocationFactor: Value=0.03
          Constant DMRetranslocationFactor: Value=0.5
          LinearInterpolationFunction CellDivisionStress: XProperty=[Maize].WaterSupplyDemandRatio
            XYPairs: X=[0.9, 1]; Y=[1, 1]
          LinearInterpolationFunction ExpansionStress: XProperty=[Maize].WaterSupplyDemandRatio
            XYPairs: X=[0.3, 1]; Y=[0.1, 1]
          LinearInterpolationFunction GrowthDuration: XProperty=[Structure].RelativeNodeApperance
            XYPairs: X=[0, 0.3, 0.5, 1]; Y=[0, 200, 250, 100]
          LinearInterpolationFunction LagDuration: XProperty=[Structure].RelativeNodeApperance
            XYPairs: X=[0, 0.5, 1]; Y=[350, 650, 600]
          LinearInterpolationFunction SenescenceDuration: XProperty=[Structure].RelativeNodeApperance
            XYPairs: X=[0, 11, 20]; Y=[359, 350, 350]
          Constant DetachmentLagDuration: Value=1000000
          Constant DetachmentDuration: Value=1000000
          LinearInterpolationFunction MaximumNConc: XProperty=[Structure].MainStemNodeNo
            XYPairs: X=[1, 10]; Y=[0.04, 0.02]
          Constant CriticalNConc: Value=0.015
          Constant MinimumNConc: Value=0.008
          AddFunction DroughtInducedSenAcceleration
            Constant One: Value=1
            MultiplyFunction Stress
              Constant StressResponseCoefficient: Value=1
              LinearInterpolationFunction StressFactor: XProperty=[Maize].WaterSupplyDemandRatio
                XYPairs: X=[0, 0.7]; Y=[0, 0]
          LinearInterpolationFunction SpecificLeafAreaMax: XProperty=[Structure].MainStemNodeNo
            XYPairs: X=[1, 9]; Y=[50000, 25000]
          LinearInterpolationFunction SpecificLeafAreaMin: XProperty=[Structure].MainStemNodeNo
            XYPairs: X=[1, 9]; Y=[8000, 8000]
          Constant StructuralFraction: Value=0.7
          Constant NonStructuralFraction: Value=0
          LinearInterpolationFunction ShadeInducedSenescenceRate: XProperty=[Leaf].CohortCurrentRankCoverAbove
            XYPairs: X=[0, 0.7, 0.8, 0.96, 0.99]; Y=[0, 0, 0, 0, 0]
          Constant InitialNConc: Value=0
        RUEModel Photosynthesis
          Constant RUE: Value=1.75
          WeightedTemperatureFunction FT: MaximumTemperatureWeighting=0.75
            XYPairs: X=[0, 8, 15, 35, 50]; Y=[0, 0, 1, 1, 0]
          LinearInterpolationFunction FVPD: XProperty=[Leaf].Photosynthesis.VPD
            XYPairs: X=[0, 10, 50]; Y=[1, 1, 1]
          LinearInterpolationFunction FN: XProperty=[Leaf].Fn
            XYPairs: X=[0, 1]; Y=[0.3, 1]
          LinearInterpolationFunction FW: XProperty=[Leaf].Fw
            XYPairs: X=[0, 0.3]; Y=[0, 1]
          RUECO2Function FCO2: PhotosyntheticPathway=C4
          VariableReference RadnInt: VariableName=[Leaf].RadIntTot
        MultiplyFunction ExtinctionCoeff
          Memo
            Extinction coefficient is specified in terms of a potential extinction coefficient which is then discounted during periods of water stress to account for the impact of leaf curling.
          LinearInterpolationFunction PotentialExtinctionCoeff: XProperty=[Leaf].LAI
            XYPairs: X=[0, 0.45]; Y=[0.65, 0.65]
          LinearInterpolationFunction WaterStressImpact: XProperty=[Maize].WaterSupplyDemandRatio
            XYPairs: X=[0, 0.7]; Y=[0.5, 1]
        LinearInterpolationFunction FrostFraction: XProperty=[Weather].MinT
          XYPairs: X=[-10, -9]; Y=[1, 0]
        VariableReference ThermalTime: VariableName=[Phenology].ThermalTime.Value
        MinimumFunction FRGRFunction
          VariableReference RUE_FT: VariableName=[Leaf].Photosynthesis.FT.Value
          MinimumFunction Others
            VariableReference RUE_FN: VariableName=[Leaf].Photosynthesis.FN.Value
            VariableReference RUE_FVPD: VariableName=[Leaf].Photosynthesis.FVPD.Value
      GenericAboveGroundOrgan Husk: FractionRemoved=0; FractionToResidue=0
        PopulationBasedDemandFunction DMDemandFunction
          VariableReference ThermalTime: VariableName=[Phenology].ThermalTime.Value
          Constant ExpansionStress: Value=1
          Constant StartStage: Value=5.2
          Constant GrowthDuration: Value=120
          Constant MaximumOrganWt: Value=25
          VariableReference OrganPopulation: VariableName=[Rachis].CobNumber.Value
        Biomass Live
        Biomass Dead
        Constant NReallocationFactor: Value=0
        Constant NRetranslocationFactor: Value=0.1
        Constant MaximumNConc: Value=0.01
        Constant StructuralFraction: Value=0.2
        Constant MinimumNConc: Value=0.01
      GenericAboveGroundOrgan Rachis: FractionRemoved=0; FractionToResidue=0
        MultiplyFunction CobNumber
          VariableReference StemNumber: VariableName=[Structure].TotalStemPopn
          Constant CobsPerStem: Value=1.1
        DivideFunction CobSize
          VariableReference CobMass: VariableName=[Rachis].Live.Wt
          VariableReference CobNumber: VariableName=[Rachis].CobNumber.Value
        PopulationBasedDemandFunction DMDemandFunction
          VariableReference ThermalTime: VariableName=[Phenology].ThermalTime.Value
          Constant ExpansionStress: Value=1
          Constant StartStage: Value=5.5
          Constant GrowthDuration: Value=300
          Constant MaximumOrganWt: Value=25
          VariableReference OrganPopulation: VariableName=[Rachis].CobNumber.Value
        Biomass Live
        Biomass Dead
        Constant NReallocationFactor: Value=0
        Constant NRetranslocationFactor: Value=0.1
        Constant MaximumNConc: Value=0.008
        Constant StructuralFraction: Value=1
        Constant MinimumNConc: Value=0.003
        LinearInterpolationFunction ExpansionStress: XProperty=[Maize].WaterSupplyDemandRatio
          XYPairs: X=[0, 0.6]; Y=[1, 1]
      GenericAboveGroundOrgan Stem: FractionRemoved=0; FractionToResidue=0
        Biomass Live
        Biomass Dead
        Constant StructuralFraction: Value=0.8
        LinearInterpolationFunction MaximumNConc: XProperty=[Structure].MainStemNodeNo
          XYPairs: X=[1, 10, 11]; Y=[0.03, 0.03, 0.005]
        Constant MinimumNConc: Value=0.006
        PhaseBasedSwitch NitrogenDemandSwitch: Start=Emergence; End=StartGrainFill
        Constant NReallocationFactor: Value=0
        Constant NRetranslocationFactor: Value=0.5
        Constant DMRetranslocationFactor: Value=0.5
        MinimumFunction DMDemandFunction
          MultiplyFunction PotentialDMAccumulation
            VariableReference NodesAppearing: VariableName=[Structure].DeltaNodeNumber
            VariableReference Branches: VariableName=[Structure].TotalStemPopn
            LinearInterpolationFunction PotentialInternodeWt: XProperty=[Structure].RelativeNodeApperance
              XYPairs: X=[0, 0.5, 1]; Y=[0, 0.2, 16]
          MultiplyFunction HightLimitedDMAccumulation
            Constant SpecificStemLengthMax: Value=500
            VariableReference Branches: VariableName=[Structure].TotalStemPopn
            VariableReference DeltaHeight: VariableName=[Structure].HeightModel.DeltaHeight
      Summariser
        CompositeBiomass AboveGround
          Propertys=[[Leaf].Live, [Leaf].Dead, [Stem].Live, [Stem].Dead, [Husk].Live, [Husk].Dead, [Grain].Live, [Grain].Dead, [Rachis].Live, [Rachis].Dead]
          Memo
            The AboveGround composite biomass object includes all organs occurring above the soil surface to allow output for total dry matter and Nutrient contents, including total structural, non-structural and metabolic pools.
        CompositeBiomass BelowGround: Propertys=[[Root].Live, [Root].Dead]
          Memo
            The BelowGround composite biomass object includes all root biomass pools to allow output for total dry matter and Nutrient contents, including total structural, non-structural and metabolic pools.
        CompositeBiomass Total
          Propertys=[[Leaf].Live, [Leaf].Dead, [Stem].Live, [Stem].Dead, [Husk].Live, [Husk].Dead, [Grain].Live, [Grain].Dead, [Rachis].Live, [Rachis].Dead, [Root].Live, [Root].Dead]
          Memo
            The Total composite biomass object includes all organs (above+below ground) to allow output for total dry matter and Nutrient contents, including total structural, non-structural and metabolic pools.
        CompositeBiomass TotalLive
          Propertys=[[Leaf].Live, [Stem].Live, [Husk].Live, [Grain].Live, [Rachis].Live, [Root].Live]
          Memo
            The TotalLive composite biomass object includes the Live pools of all organs (above+below ground) to allow output for total dry matter and Nutrient contents, including total structural, non-structural and metabolic pools.
        CompositeBiomass TotalDead
          Propertys=[[Leaf].Dead, [Stem].Dead, [Husk].Dead, [Grain].Dead, [Rachis].Dead, [Root].Dead]
          Memo
            The TotalDead composite biomass object includes the Dead pools of all organs (above+below ground) to allow output for total dry matter and Nutrient contents, including total structural, non-structural and metabolic pools.
        CompositeBiomass EarLive: Propertys=[[Husk].Live, [Grain].Live, [Rachis].Live]
          Memo
            The EarLive composite biomass object includes the Live pools of all organs within the Ear to allow output for total dry matter and Nutrient contents, including total structural, non-structural and metabolic pools.
        CompositeBiomass AboveGroundLive
          Propertys=[[Leaf].Live, [Stem].Live, [Husk].Live, [Grain].Live, [Rachis].Live]
          Memo
            The AboveGroundLive composite biomass object includes the Live pools of all organs occurring above the soil surface to allow output for total dry matter and Nutrient contents, including total structural, non-structural and metabolic pools.
        CompositeBiomass AboveGroundDead
          Propertys=[[Leaf].Dead, [Stem].Dead, [Husk].Dead, [Grain].Dead, [Rachis].Dead]
          Memo
            The AboveGroundDead composite biomass object includes the Dead pools of all organs occurring above the soil surface to allow output for total dry matter and Nutrient contents, including total structural, non-structural and metabolic pools.
      Cultivar Pioneer_39G12: Command=[Phenology].GrainFilling.Target.Value = 550
      Cultivar Pioneer_3153
      Cultivar Katumani
        Command:
          [Phenology].Juvenile.Target.Value = 150
          [Phenology].Photosensitive.Target.XYPairs.X = 0, 12.5, 24
          [Phenology].Photosensitive.Target.XYPairs.Y = 0, 0, 115
          [Phenology].FlagLeafToFlowering.Target.Value = 10
          [Phenology].FloweringToGrainFilling.Target.Value = 120
          [Phenology].GrainFilling.Target.Value = 530
          [Rachis].DMDemandFunction.MaximumOrganWt.Value = 14
          [Grain].NumberFunction.KernalsPerCob.XYPairs.X = 0, 14
          [Grain].NumberFunction.KernalsPerCob.XYPairs.Y = 0, 405
        Memo
          The variety Katumani Composite B was formed in 1966 and released in 1968 as part of the maize breeding work undertaken at the Katumani Research Station in Kenya which started in 1956.  Katumani Composite B was an advanced generation of Katumani Synthetic V X Katumani Synthetic VI.  It has slight photoperiod sensitivity and relatively small potential cob size.
      Cultivar Dekalb_XL82
        Command:
          [Phenology].Juvenile.Target.Value = 211
          [Phenology].Photosensitive.Target.XYPairs.X = 0, 12.5, 24
          [Phenology].Photosensitive.Target.XYPairs.Y = 0, 0, 472
          [Phenology].FlagLeafToFlowering.Target.Value = 101
          [Phenology].FloweringToGrainFilling.Target.Value = 170
          [Phenology].GrainFilling.Target.Value = 813
          [Rachis].DMDemandFunction.MaximumOrganWt.Value = 25
          [Grain].NumberFunction.KernalsPerCob.XYPairs.X = 0, 25
          [Grain].NumberFunction.KernalsPerCob.XYPairs.Y = 0, 550
      Cultivar GH_5009
        Command:
          [Phenology].Juvenile.Target.Value = 220
          [Phenology].Photosensitive.Target.XYPairs.X = 0, 12.5, 24
          [Phenology].Photosensitive.Target.XYPairs.Y = 0, 0, 300
          [Phenology].FlagLeafToFlowering.Target.Value = 50
          [Phenology].FloweringToGrainFilling.Target.Value = 170
          [Phenology].GrainFilling.Target.Value = 713
          [Rachis].DMDemandFunction.MaximumOrganWt.Value = 25
          [Grain].NumberFunction.KernalsPerCob.XYPairs.X = 0, 25
          [Grain].NumberFunction.KernalsPerCob.XYPairs.Y = 0, 550
      Cultivar Hycorn_40
        Command:
          [Phenology].Juvenile.Target.Value = 200
          [Phenology].Photosensitive.Target.XYPairs.X = 0, 12.5, 24
          [Phenology].Photosensitive.Target.XYPairs.Y = 0, 0, 300
          [Phenology].FlagLeafToFlowering.Target.Value = 50
          [Phenology].FloweringToGrainFilling.Target.Value = 170
          [Phenology].GrainFilling.Target.Value = 713
          [Rachis].DMDemandFunction.MaximumOrganWt.Value = 25
          [Grain].NumberFunction.KernalsPerCob.XYPairs.X = 0, 25
          [Grain].NumberFunction.KernalsPerCob.XYPairs.Y = 0, 550
      Cultivar GH_5019WX
        Command:
          [Phenology].Juvenile.Target.Value = 245
          [Phenology].Photosensitive.Target.XYPairs.X = 0, 12, 24
          [Phenology].Photosensitive.Target.XYPairs.Y = 0, 0, 300
          [Phenology].FlagLeafToFlowering.Target.Value = 101
          [Phenology].FloweringToGrainFilling.Target.Value = 170
          [Phenology].GrainFilling.Target.Value = 694
          [Rachis].DMDemandFunction.MaximumOrganWt.Value = 25
          [Grain].NumberFunction.KernalsPerCob.XYPairs.X = 0, 25
          [Grain].NumberFunction.KernalsPerCob.XYPairs.Y = 0, 550
      Cultivar Laila
        Command:
          [Phenology].Juvenile.Target.Value = 211
          [Phenology].Photosensitive.Target.XYPairs.X = 0, 12.5, 24
          [Phenology].Photosensitive.Target.XYPairs.Y = 0, 0, 0
          [Phenology].FlagLeafToFlowering.Target.Value = 1
          [Phenology].FloweringToGrainFilling.Target.Value = 170
          [Phenology].GrainFilling.Target.Value = 812
          [Phenology].Maturing.Target.Value = 1
          [Phenology].MaturityToHarvestRipe.Target.Value = 1
          [Rachis].DMDemandFunction.MaximumOrganWt.Value = 36
          [Grain].NumberFunction.KernalsPerCob.XYPairs.X = 0, 36
          [Grain].NumberFunction.KernalsPerCob.XYPairs.Y = 0, 720
      Cultivar Pioneer_39V43
        Command:
          [Phenology].Juvenile.Target.Value = 80
          [Phenology].GrainFilling.Target.Value = 450
          [Phenology].FloweringToGrainFilling.Target.Value = 170
          [Structure].MainStemNodeAppearanceRate.Phyllochron.Phyllochron.XYPairs.X = 1, 4, 4.2, 10.5, 11
          [Structure].MainStemNodeAppearanceRate.Phyllochron.Phyllochron.XYPairs.Y = 26, 26, 46, 46, 70
          [Rachis].DMDemandFunction.MaximumOrganWt.Value = 18
          [Structure].HeightModel.PotentialHeight.XYPairs.X = 3, 4, 5, 6
          [Structure].HeightModel.PotentialHeight.XYPairs.Y = 20, 40, 50, 1300
          [Stem].DMDemandFunction.PotentialDMAccumulation.PotentialInternodeWt.XYPairs.Y = 0, 0.15, 10
        Memo
          VShort duration variety released in New Zealand by Pioneer
      Cultivar Pioneer_34K77
        Command:
          [Phenology].Juvenile.Target.Value = 280
          [Phenology].GrainFilling.Target.Value = 550
        Memo
          VShort duration variety released in New Zealand by Pioneer
      Cultivar Pioneer_38H20
        Command:
          [Phenology].Juvenile.Target.Value = 150
          [Phenology].GrainFilling.Target.Value = 550
      Cultivar Pioneer_33M54: Command=[Phenology].GrainFilling.Target.Value = 550
    Soil: Site=ICRAF Machakos Research Station; NearestTown=Machakos; Country=Kenya; Latitude=-1.55; Longitude=37.13
      Water
        Thickness  BD    AirDry  LL15  DUL   SAT
        200        1.35  0.04    0.1   0.2   0.35
        200        1.35  0.14    0.1   0.2   0.35
        200        1.35  0.14    0.14  0.22  0.37
        200        1.4   0.15    0.17  0.24  0.37
        200        1.4   0.16    0.17  0.24  0.38
        200        1.4   0.16    0.17  0.24  0.38
        200        1.4   0.16    0.17  0.24  0.38
        200        1.4   0.16    0.17  0.24  0.38
        SoilCrop MaizeSoil: LL=[0.1, 0.1, 0.14, 0.17, 0.17, 0.17, 0.17, 0.17]; KL=[0.08, 0.08, 0.08, 0.08, 0.06, 0.04, 0.03, 0.02]; XF=[1, 1, 1, 1, 1, 1, 1, 1]
      SoilWater: residueinterception=0; SummerDate=1-Nov; SummerU=9; SummerCona=2.5; WinterDate=1-Apr; WinterU=9; WinterCona=2.5; DiffusConst=88; DiffusSlope=35.4; Salb=0.13; CN2Bare=65; CNRed=20; CNCov=0.8; max_pond=0; Thickness=[200, 1400]; SWCON=[0.7, 0.7]
      SoilNitrogen: fom_type=[default, manure, mucuna, lablab, shemp, stable]; fract_carb=[0.2, 0.3, 0.54, 0.57, 0.45, 0]; fract_cell=[0.7, 0.3, 0.37, 0.37, 0.47, 0.1]; fract_lign=[0.1, 0.4, 0.09, 0.06, 0.08, 0.9]; wfpsN2N2O_x=[22, 88]; wfpsN2N2O_y=[0.1, 1]
      SoilOrganicMatter: RootCN=45; RootWt=500; SoilCN=12; EnrACoeff=7.4; EnrBCoeff=0.2; OCUnits=Total
        Thickness  OC   FBiom  FInert
        200        1.1  0.04   0.4
        200        0.8  0.02   0.5
        200        0.6  0.01   0.8
        200        0.6  0.01   0.9
        200        0.2  0.01   0.95
        200        0.1  0.01   0.95
        200        0.1  0.01   0.99
        200        0.1  0.01   0.99
      Analysis: Thickness=[200, 200, 200, 200, 200, 200, 200, 200]; PH=[6.5, 6.5, 6.5, 6.5, 6.5, 6.5, 6.5, 6.5]; PHUnits=Water; BoronUnits=HotWater
      Sample: NO3Units=ppm; NH4Units=ppm; SWUnits=Volumetric; OCUnits=Total; PHUnits=Water
        Thickness  NO3  NH4  SW
        200        10   10   0.13
        200        5    5    0.13
        200        2    2    0.16
        200        1    1    0.176
        200        0.5  0.5  0.17
        200        0.5  0.5  0.17
        200        0.5  0.5  0.17
        200        0.5  0.5  0.17
  DataStore
    ExcelInput Observed: FileName=OdhiamboObserved.xlsx; SheetNames=[OBSCrop, OBSSW35cm, OBSSW55cm, OBSSW75cm]
    PredictedObserved PvO35cm: PredictedTableName=DailyReport; ObservedTableName=OBSSW35cm; FieldNameUsedForMatch=ZoneName; FieldName2UsedForMatch=Date
    PredictedObserved PvO55cm: PredictedTableName=DailyReport; ObservedTableName=OBSSW55cm; FieldNameUsedForMatch=ZoneName; FieldName2UsedForMatch=Date
    PredictedObserved PvO75cm: PredictedTableName=DailyReport; ObservedTableName=OBSSW75cm; FieldNameUsedForMatch=ZoneName; FieldName2UsedForMatch=Date
  Folder Grevillea
    Simulation Grevillea: Area=0; Slope=0
      Clock: StartDate=1996-03-01; EndDate=1997-12-31
      Summary SummaryFile
      Weather: FileName=Machakos1992-1998 PS1509020.met
      SoilArbitrator Soil Arbitrator
      AgroforestrySystem WindbreakSystem: Area=0.085; Slope=0
        Report TreeReport: EventNames=[Clock].DoReport; ResultsPerPage=0
          VariableNames:
            [Clock].Today
            [TreeProxy].heightToday
            [TreeProxy].LeafAreaToday
            [TreeProxy].CanopyWidthToday
        Manager Sowing1996
          SowDate = 13/03/1996
          CultivarName = Katumani
          SowingDepth = 30
          RowSpacing = 1000
          Population = 2.8
          Amount = 100
          CropName = Maize
```csharp
using System;
using System.Collections.Generic;
using Models.Core;
using Models.Agroforestry;
using Models.PMF;
using Models.Soils;
using Models.Utilities;
using Models.Zones;
using APSIM.Shared.Utilities;

namespace Models
{
	[Serializable]
	public class Script : Model
	{
		[Link] Clock Clock;
		[Link] Summary Summary;
		
		[Description("Sowing date (d-mmm-yyyy)")]
		public string SowDate { get; set; }
		[Description("Cultivar to be sown")]
		public string CultivarName { get; set; }
		[Description("Sowing depth (mm)")]
		public double SowingDepth { get; set; }
		[Description("Row spacing (mm)")]
		public double RowSpacing { get; set; }
		[Description("Plant population (/m2)")]
		public double Population { get; set; }
		[Description("Amount of fertiliser to be applied (kg/ha)")]
		public double Amount { get; set; }
		[Description("Crop to be fertilised")]
		public string CropName { get; set; }
		
		private List<IModel> Zones;
		private Plant Maize;
		private Soil Soil;
		
		[EventSubscribe("Commencing")]
		private void OnSimulationCommencing(object sender, EventArgs e)
		{
			Zones = Apsim.FindAll(this, typeof(RectangularZone));
		}
		
		[EventSubscribe("DoManagement")]
		private void OnDoManagement(object sender, EventArgs e)
		{		
			if (DateUtilities.DMYtoDate(SowDate) == Clock.Today)
			{
			
				foreach (Zone z in Zones)
				{
					Maize = Apsim.Find(z, typeof(Plant)) as Plant;	
					Soil = Apsim.Find(z, typeof(Soil)) as Soil;
							
					if (Maize != null)
					{
						Maize.Sow(population: Population, cultivar: CultivarName, depth: SowingDepth, rowSpacing: RowSpacing);
						Fertiliser Fertiliser = Apsim.Find(Maize.Parent, typeof(Fertiliser)) as Fertiliser;
						Fertiliser.Apply(Amount: Amount, Type: Fertiliser.Types.NO3N);
					}
					//else
					//	throw new ApsimXException(null, "Cannot sow Maize on that date");
				}
			}
		}
	}
}
```
        Manager Sowing1997
          SowDate = 02/04/1997
          CultivarName = Katumani
          SowingDepth = 30
          RowSpacing = 1000
          Population = 2.8
          Amount = 100
          CropName = Maize
          script: same as in Grevillea.Grevillea.WindbreakSystem.Sowing1996
        TreeProxy: RootRadius=0.02; Kd=1E-07; BaseKL=0.01; KValue=0; CanopyWidths=[2, 2, 2, 2, 2, 2, 2, 2, 2, 2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]; TreeLeafAreas=[2, 2, 2, 2, 2, 2, 2, 2, 2, 2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]
          Table=[[Parameter, 0, 0.5h, 1h, 1.5h, 2h, 2.5h, 3h, 4h, 5h, 6h], [Shade (%), Root Length Density (cm/cm3), Depth (cm), 0-20, 20-40, 40-60, 60-80, 80-100, 100-120, 120-140, 140-160], [80, , , 3, 2, 1, .5, .1, .1, .1, .1], [0, , , 2, 1, .5, .5, .1, .1, .1, .1], [0, , , 1, .5, .2, .1, .1, 0, 0, 0], [0, , , .5, .3, .2, .2, .05, 0, 0, 0], [0, , , .02, .02, .02, .01, 0, 0, 0, 0], [0, , , .01, .01, 0, 0, 0, 0, 0, 0], [0, , , .01, .01, 0, 0, 0, 0, 0, 0], [0, , , 0, 0, 0, 0, 0, 0, 0, 0], [0, , , 0, 0, 0, 0, 0, 0, 0, 0], [0, , , 0, 0, 0, 0, 0, 0, 0, 0]]
          dates=[1993-12-15, 1994-01-15, 1994-02-15, 1994-03-15, 1994-04-15, 1994-05-15, 1994-06-15, 1994-07-15, 1994-08-15, 1994-09-15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]
          heights=[921.532, 1164.66, 1332.5, 1613.06, 1912.55, 2268.62, 2567.99, 2641.61, 2621.22, 2713.55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]
          NDemands=[0.1, 0.1, 0.1, 0.1, 0.1, 0.1, 0.1, 0.1, 0.1, 0.1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]
        RectangularZone TreeRow: Area=0.005; Slope=0; Length=100; Width=0.5
          LocalMicroClimate
          MicroClimate: air_pressure=1010; soil_emissivity=0.96; sun_angle=15; soil_heat_flux_fraction=0.4; night_interception_fraction=0.5; windspeed_default=3; refheight=2; albedo=0.15; emissivity=0.96; gsmax=0.01; r50=200; a_interception=0; b_interception=0; c_interception=0; d_interception=0; soil_albedo=0.23
          Report: ResultsPerPage=0
            VariableNames:
              [Clock].Today
              [Zone].Area
              Distance
              Radn
              [LocalMicroClimate].Radn
              [TreeProxy].Shade
          Report DailyReport: EventNames=[Clock].DoReport; ResultsPerPage=0
            VariableNames:
              [Clock].Today
              Distance
              LocalMicroClimate.Wind
              sum([Soil].NO3N) as TotalNO3N
              sum([Soil].NH4N) as TotalNH4N
              sum([TreeProxy].WaterUptake) as WaterUptake
              sum([Soil].SoilWater.SWmm[1:4]) as SW90cm
              [TreeProxy].Urel
              [TreeProxy].H
              [TreeProxy].SWDemand
              [TreeProxy].heightToday
              [MicroClimate].peta
              [MicroClimate].petr
              [Soil].SoilWater.Eo
              [TreeProxy].WaterStress
              [Soil].SoilWater.SW[1] as SurfaceSW
          Fertiliser
          SurfaceOrganicMatter: PoolName=wheat_stubble; type=wheat; mass=500; standing_fraction=0; cnr=100; CriticalResidueWeight=2000; OptimumDecompTemp=20; MaxCumulativeEOS=20; CNRatioDecompCoeff=0.277; CNRatioDecompThreshold=25; TotalLeachRain=25; MinRainToLeach=10; CriticalMinimumOrganicC=0.004; DefaultCPRatio=0; DefaultStandingFraction=0; StandingExtinctCoeff=0.5; FractionFaecesAdded=0.5
            Pools:
              {PoolName=wheat_stubble, ResidueType=wheat, Mass=500, CNRatio=100, StandingFraction=0}
            ResidueTypes: LoadFromResource=ResidueTypes
          Soil: Site=ICRAF Machakos Research Station; NearestTown=Machakos; Country=Kenya; Latitude=-1.55; Longitude=37.13
            Water
              Thickness  BD    AirDry  LL15   DUL   SAT
              200        1.35  0.04    0.1    0.2   0.35
              200        1.35  0.14    0.1    0.2   0.35
              200        1.35  0.14    0.14   0.29  0.37
              200        1.4   0.15    0.174  0.29  0.37
              200        1.4   0.16    0.174  0.29  0.38
              200        1.4   0.16    0.174  0.29  0.38
              200        1.4   0.16    0.174  0.29  0.38
              200        1.4   0.16    0.174  0.29  0.38
              SoilCrop MaizeSoil: LL=[0.1, 0.1, 0.14, 0.174, 0.17, 0.17, 0.17, 0.17]; KL=[0.08, 0.08, 0.08, 0.08, 0.06, 0.04, 0.03, 0.02]; XF=[1, 1, 1, 1, 1, 1, 1, 1]
            SoilWater: residueinterception=0; SummerDate=1-Nov; SummerU=9; SummerCona=2.5; WinterDate=1-Apr; WinterU=9; WinterCona=2.5; DiffusConst=88; DiffusSlope=35.4; Salb=0.13; CN2Bare=65; CNRed=20; CNCov=0.8; max_pond=0; Thickness=[200, 1400]; SWCON=[0.5, 0.5]
            SoilNitrogen: fom_type=[default, manure, mucuna, lablab, shemp, stable]; fract_carb=[0.2, 0.3, 0.54, 0.57, 0.45, 0]; fract_cell=[0.7, 0.3, 0.37, 0.37, 0.47, 0.1]; fract_lign=[0.1, 0.4, 0.09, 0.06, 0.08, 0.9]; wfpsN2N2O_x=[22, 88]; wfpsN2N2O_y=[0.1, 1]
            SoilOrganicMatter: same as Replacements.Soil.SoilOrganicMatter
            Analysis: Thickness=[200, 200, 200, 200, 200, 200, 200, 200]; PH=[6.5, 6.5, 6.5, 6.5, 6.5, 6.5, 6.5, 6.5]; PHUnits=Water; BoronUnits=HotWater
            Sample: NO3Units=ppm; NH4Units=ppm; SWUnits=Volumetric; OCUnits=Total; PHUnits=Water
              Thickness  NO3  NH4  SW
              200        10   10   0.1
              200        5    5    0.1
              200        2    2    0.14
              200        1    1    0.15
              200        0.5  0.5  0.16
              200        0.5  0.5  0.16
              200        0.5  0.5  0.16
              200        0.5  0.5  0.16
        RectangularZone 1m: Area=0.01; Slope=0; Length=100; Width=1
          LocalMicroClimate
          MicroClimate: same as Grevillea.Grevillea.WindbreakSystem.TreeRow.MicroClimate
          Report HarvestReport: EventNames=[Maize].Harvesting; ResultsPerPage=0
            VariableNames:
              [Clock].Today
              [Zone].Area
              Distance
              [Maize].Phenology.CurrentStageName as Stage
              [Maize].Grain.Live.Wt as GrainWt
              [Maize].Stem.Live.Wt
              [Maize].Summariser.EarLive.Wt
              [Maize].Leaf.Live.Wt
              [Maize].Root.Live.Wt
              [Maize].Husk.Live.Wt
              [Maize].Rachis.Live.Wt
              [Maize].Summariser.EarLive.N
              [Maize].Grain.Live.N
              [Maize].Stem.Live.N
              [Maize].Leaf.Live.N
              [Maize].Root.Live.N
              [Maize].Root.Depth
              [Maize].Summariser.AboveGround.N
              [Maize].Summariser.AboveGround.Wt as Biomass
              [Maize].Summariser.Total.N
              [Maize].Summariser.Total.Wt
              max of [Maize].Leaf.LAI from [Maize].Sowing to [Maize].Harvesting as LAImax
              [Maize].Grain.NumberFunction.Value as GPSM
              [Maize].Grain.Size as GrainSize
              [Maize].Population
              [Maize].Phenology.FloweringDAS.Value as FloweringDAS
          Report DailyReport: EventNames=[Clock].DoReport; ResultsPerPage=0
            VariableNames:
              [Clock].Today
              Distance
              LocalMicroClimate.Wind
              sum([Soil].SoilWater.SWmm[1:4]) as SW90cm
              sum([Soil].NO3N) as TotalNO3N
              sum([Soil].NH4N) as TotalNH4N
              [MicroClimate].peta
              [MicroClimate].petr
              [Maize].AboveGround.Wt as BiomassWt
              [Maize].Grain.Wt as GrainWt
              [Soil].SoilWater.SW[1] as SurfaceSW
          Fertiliser
          SurfaceOrganicMatter: same as Grevillea.Grevillea.WindbreakSystem.TreeRow.SurfaceOrganicMatter
          Plant Maize: CropType=Maize
          Manager Harvesting
```csharp
using System;
using Models.Core;
using System.Collections.Generic;
using System.Text;
using Models.Soils;
using Models.PMF;
using Models;
using System.Xml.Serialization;
using APSIM.Shared.Utilities;

namespace Models
{
	[Serializable] 
	public class Script : Model
	{
		[Link] Plant Maize;
		[Link] Zone zone;
					
        
		[EventSubscribe("Commencing")]
		private void OnSimulationCommencing(object sender, EventArgs e)
		{
		}
		
		[EventSubscribe("DoManagement")]
		private void OnDoManagement(object sender, EventArgs e)
		{
			if (Maize.Phenology.CurrentPhaseName == "ReadyForHarvesting")
			{
				Maize.Harvest();
				Maize.EndCrop();
			}
		}
		
		[EventSubscribe("DoManagementCalculations")]
		private void OnDoManagementCalculations(object sender, EventArgs e)
		{
			
		}
	}
}
```
          Soil: Site=ICRAF Machakos Research Station; NearestTown=Machakos; Country=Kenya; Latitude=-1.55; Longitude=37.13
            Water
              Thickness  BD    AirDry  LL15  DUL   SAT
              200        1.35  0.04    0.1   0.2   0.35
              200        1.35  0.14    0.1   0.2   0.35
              200        1.35  0.14    0.14  0.29  0.37
              200        1.4   0.15    0.15  0.29  0.37
              200        1.4   0.16    0.16  0.29  0.38
              200        1.4   0.16    0.16  0.29  0.38
              200        1.4   0.16    0.16  0.29  0.38
              200        1.4   0.16    0.16  0.29  0.38
              SoilCrop MaizeSoil: LL=[0.1, 0.1, 0.14, 0.15, 0.16, 0.16, 0.16, 0.16]; KL=[0.08, 0.08, 0.08, 0.08, 0.06, 0.04, 0.03, 0.02]; XF=[1, 1, 1, 1, 1, 1, 1, 1]
            SoilWater: same as Grevillea.Grevillea.WindbreakSystem.TreeRow.Soil.SoilWater
            SoilNitrogen: fom_type=[default, manure, mucuna, lablab, shemp, stable]; fract_carb=[0.2, 0.3, 0.54, 0.57, 0.45, 0]; fract_cell=[0.7, 0.3, 0.37, 0.37, 0.47, 0.1]; fract_lign=[0.1, 0.4, 0.09, 0.06, 0.08, 0.9]; wfpsN2N2O_x=[22, 88]; wfpsN2N2O_y=[0.1, 1]
            SoilOrganicMatter: same as Replacements.Soil.SoilOrganicMatter
            Analysis: Thickness=[200, 200, 200, 200, 200, 200, 200, 200]; PH=[6.5, 6.5, 6.5, 6.5, 6.5, 6.5, 6.5, 6.5]; PHUnits=Water; BoronUnits=HotWater
            Sample: same as Grevillea.Grevillea.WindbreakSystem.TreeRow.Soil.Sample
        RectangularZone 2m: Area=0.01; Slope=0; Length=100; Width=1
          LocalMicroClimate
          MicroClimate: same as Grevillea.Grevillea.WindbreakSystem.TreeRow.MicroClimate
          Report HarvestReport: same as Grevillea.Grevillea.WindbreakSystem.1m.HarvestReport
          Report DailyReport: same as Grevillea.Grevillea.WindbreakSystem.1m.DailyReport
          Fertiliser
          SurfaceOrganicMatter: same as Grevillea.Grevillea.WindbreakSystem.TreeRow.SurfaceOrganicMatter
          Plant Maize: CropType=Maize
          Manager Harvesting
            script: same as in Grevillea.Grevillea.WindbreakSystem.1m.Harvesting
          Soil: Site=ICRAF Machakos Research Station; NearestTown=Machakos; Country=Kenya; Latitude=-1.55; Longitude=37.13
            Water
              Thickness  BD    AirDry  LL15  DUL   SAT
              200        1.35  0.04    0.1   0.2   0.35
              200        1.35  0.14    0.1   0.2   0.35
              200        1.35  0.14    0.14  0.29  0.37
              200        1.4   0.15    0.17  0.29  0.37
              200        1.4   0.16    0.17  0.29  0.38
              200        1.4   0.16    0.17  0.29  0.38
              200        1.4   0.16    0.17  0.29  0.38
              200        1.4   0.16    0.17  0.29  0.38
              SoilCrop MaizeSoil: LL=[0.1, 0.1, 0.14, 0.17, 0.17, 0.17, 0.17, 0.17]; KL=[0.08, 0.08, 0.08, 0.08, 0.06, 0.04, 0.03, 0.02]; XF=[1, 1, 1, 1, 1, 1, 1, 1]
            SoilWater: same as Grevillea.Grevillea.WindbreakSystem.TreeRow.Soil.SoilWater
            SoilNitrogen: fom_type=[default, manure, mucuna, lablab, shemp, stable]; fract_carb=[0.2, 0.3, 0.54, 0.57, 0.45, 0]; fract_cell=[0.7, 0.3, 0.37, 0.37, 0.47, 0.1]; fract_lign=[0.1, 0.4, 0.09, 0.06, 0.08, 0.9]; wfpsN2N2O_x=[22, 88]; wfpsN2N2O_y=[0.1, 1]
            SoilOrganicMatter: same as Replacements.Soil.SoilOrganicMatter
            Analysis: Thickness=[200, 200, 200, 200, 200, 200, 200, 200]; PH=[6.5, 6.5, 6.5, 6.5, 6.5, 6.5, 6.5, 6.5]; PHUnits=Water; BoronUnits=HotWater
            Sample: NO3Units=ppm; NH4Units=ppm; SWUnits=Volumetric; OCUnits=Total; PHUnits=Water
              Thickness  NO3  NH4  SW
              200        10   10   0.1
              200        5    5    0.1
              200        2    2    0.14
              200        1    1    0.17
              200        0.5  0.5  0.17
              200        0.5  0.5  0.17
              200        0.5  0.5  0.17
              200        0.5  0.5  0.17
        RectangularZone 3m: same as Grevillea.Grevillea.WindbreakSystem.1m
        RectangularZone 4m: same as Grevillea.Grevillea.WindbreakSystem.1m
        RectangularZone 5m: same as Grevillea.Grevillea.WindbreakSystem.1m
        RectangularZone 6m: same as Grevillea.Grevillea.WindbreakSystem.1m
        RectangularZone 7m: same as Grevillea.Grevillea.WindbreakSystem.1m
        RectangularZone 8m: Area=0.01; Slope=0; Length=100; Width=1
          LocalMicroClimate
          MicroClimate: same as Grevillea.Grevillea.WindbreakSystem.TreeRow.MicroClimate
          Report HarvestReport: same as Grevillea.Grevillea.WindbreakSystem.1m.HarvestReport
          Report DailyReport: EventNames=[Clock].DoReport; ResultsPerPage=0
            VariableNames:
              [Clock].Today
              Distance
              LocalMicroClimate.Wind
              sum([Soil].SoilWater.SWmm[1:4]) as SW90cm
              sum([Soil].NO3N) as TotalNO3N
              sum([Soil].NH4N) as TotalNH4N
              [MicroClimate].peta
              [MicroClimate].petr
              [Maize].AboveGround.Wt as BiomassWt
              [Maize].Grain.Wt as GrainWt
              [Soil].SoilWater.SW[1] as SurfaceSW
              [Maize].Leaf.Fn
          Fertiliser
          SurfaceOrganicMatter: same as Grevillea.Grevillea.WindbreakSystem.TreeRow.SurfaceOrganicMatter
          Plant Maize: CropType=Maize
          Manager Harvesting: same as Grevillea.Grevillea.WindbreakSystem.1m.Harvesting
          Soil: same as Grevillea.Grevillea.WindbreakSystem.1m.Soil
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