Simulations: Version=133
  Simulation FoodInPond
    Weather: FileName=Ingham.met
    Summary summaryfile
    MicroClimate: a_interception=0; b_interception=1; c_interception=0; d_interception=0; SoilHeatFluxFraction=0.4; MinimumHeightDiffForNewLayer=0; NightInterceptionFraction=0.5; ReferenceHeight=2
    Clock: Start=1990-01-01; End=1990-12-31
    Zone Pond: Area=1; Slope=0; AspectAngle=0; Altitude=50
      PondWater: SurfaceArea=10000; MaxPondDepth=1; Kpan=1
      FoodInPond
      Folder Manager folder
        Manager Add water on fixed date
          added_date = 01-jan
          volume = 10000
          temperature = 15
          salinity = 5
          ph = 2
          n = 3
          p = 4
          tss = 10
```csharp
using Models.Aqua;
using APSIM.Shared.Utilities;
using Models.Core;
using System;

namespace Models
{
    [Serializable]
    [System.Xml.Serialization.XmlInclude(typeof(Model))]
    public class Script : Model
    {

        [Link] Clock Clock;
        [Link] Summary Summary;
        [Link] PondWater PondWater;
        
        
        [Description("Add Water on this date (dd-mmm)")]
        public string added_date {get; set;}
        
        [Description("Volume of Water Added (m^3)")]
        public double volume {get; set;}
        
        [Description("Temperature of Water Added (oC)")]
        public double temperature {get; set;}
        
        [Description("Salinity of Water Added (kg/m^3)")]
        public double salinity {get; set;}
        
        [Description("PH of Water Added")]
        public double ph {get; set;}
        
        [Description("Nitrogen of Water Added (kg/m^3)")]
        public double n {get; set;}
    
        [Description("Phosphorus of Water Added (kg/m^3)")]
        public double p {get; set;}
        
        [Description("Total Suspended Solids of Water Added (kg/m^3)")]
        public double tss {get; set;}


        
       [EventSubscribe("StartOfSimulation")]
        private void OnStartOfSimulation(object sender, EventArgs e)
        {
        }
        
        
        
        [EventSubscribe("StartOfDay")]
        private void OnStartOfDay(object sender, EventArgs e)
        {

        if (DateUtilities.DatesEqual(added_date, Clock.Today))
            {
            WaterProperties addedProps = new WaterProperties(temperature, salinity, ph, n, p, tss);
            PondWater.Fill(Volume: volume, WaterProperties: addedProps);
            }

        }
      
    }
}
```
        Manager Add water on fixed date1
          added_date = 01-oct
          volume = 10000
          temperature = 15
          salinity = 5
          ph = 2
          n = 3
          p = 4
          tss = 10
          script: same as in FoodInPond.Pond.Manager folder.Add water on fixed date
        Manager Add Feed on fixed date
          added_date = 05-jan
          FeedName = TestFeed
          DryMatter = 100
          Nitrogen = 20
          DigestibleEnergy = 3000
```csharp
using Models.Aqua;
using APSIM.Shared.Utilities;
using Models.Core;
using System;

namespace Models
{
    [Serializable]
    [System.Xml.Serialization.XmlInclude(typeof(Model))]
    public class Script : Model
    {

        [Link] Clock Clock;
        [Link] Summary Summary;
        [Link] FoodInPond FoodInPond;
        
        
        [Description("Add feed on this date (dd-mmm)")]
        public string added_date {get; set;}

        [Description("Name of the feed")]
        public string FeedName {get; set;}
        
        [Description("Amount of feed added (as Dry Matter) (kg)")]
        public double DryMatter {get; set;}
        
        [Description("Amount of Nitrogen in the feed added (kg)")]
        public double Nitrogen {get; set;}
        
        [Description("Amount of Digestible Energy in the feed added (MJ)")]
        public double DigestibleEnergy {get; set;}
        


        
       [EventSubscribe("StartOfSimulation")]
        private void OnStartOfSimulation(object sender, EventArgs e)
        {
        }
        
        
        
        [EventSubscribe("StartOfDay")]
        private void OnStartOfDay(object sender, EventArgs e)
        {

        if (DateUtilities.DatesEqual(added_date, Clock.Today))
            {
            Feed newFeed = new Feed(FeedName, DryMatter, Nitrogen, DigestibleEnergy);
            FoodInPond.Food.AddFeed(newFeed);
            }

        }
      
    }
}
```
        Manager Add Feed on fixed date1
          added_date = 10-jan
          FeedName = ShaunFeed
          DryMatter = 100
          Nitrogen = 20
          DigestibleEnergy = 3000
          script: same as in FoodInPond.Pond.Manager folder.Add Feed on fixed date
      Report: EventNames=[Clock].DoReport
        VariableNames:
          [Clock].Today
          [FoodInPond].Food.TotalDM as TotalDM
          [FoodInPond].Food..TotalN as TotalN
          [FoodInPond].Food..TotalDE as TotalDE
          [FoodInPond].Food.NumFeeds as NumFeeds
          [FoodInPond].Food.FeedNames as FeedNames
          [FoodInPond].Food.FeedDMs as FeedDMs
          [FoodInPond].Food.FeedNs as FeedNs
          [FoodInPond].Food.FeedDEs as FeedDEs
      Soil: ASCOrder=Vertosol; ASCSubOrder=Black; SoilType=Clay; Site=Norwin; NearestTown=Norwin; Region=Darling Downs and Granite Belt; State=Queensland; Country=Australia; NaturalVegetation=Qld. Bluegrass, possible Qld. Blue gum; ApsoilNumber=900; Latitude=-27.581836; Longitude=151.320206; LocationAccuracy=+/- 20m
        DataSource=CSIRO Sustainable Ecosystems, Toowoomba; Characteriesd as part of the GRDC funded project"Doing it better, doing it smarter, managing soil water in Australian agriculture' 2011
        Comments=OC, CLL for all crops estimated-based on Bongeen Mywybilla Soil No1
        Physical
          Thickness  BD       AirDry    LL15      DUL       SAT       KS
          150        1.01056  0.13025   0.2605    0.521     0.588655  20
          150        1.07146  0.198689  0.248362  0.496723  0.565677  20
          300        1.09394  0.28      0.28      0.488438  0.557193  20
          300        1.15861  0.28      0.28      0.480297  0.532787  20
          300        1.17301  0.28      0.28      0.471584  0.527354  20
          300        1.16287  0.28      0.28      0.457071  0.53118   20
          300        1.1875   0.28      0.28      0.452332  0.521888  20
          SoilCrop WheatSoil: LL=[0.261, 0.248, 0.28, 0.306, 0.36, 0.392, 0.446]; KL=[0.06, 0.06, 0.06, 0.04, 0.04, 0.02, 0.01]; XF=[1, 1, 1, 1, 1, 1, 1]
        WaterBalance SoilWater: SummerDate=1-Nov; SummerU=5; SummerCona=5; WinterDate=1-Apr; WinterU=5; WinterCona=5; DiffusConst=40; DiffusSlope=16; Salb=0.12; CN2Bare=73; CNRed=20; CNCov=0.8; Thickness=[150, 150, 300, 300, 300, 300, 300]; SWCON=[0.3, 0.3, 0.3, 0.3, 0.3, 0.3, 0.3]
        Organic: FOMCNRatio=40
          Thickness  Carbon  SoilCNRatio  FBiom  FInert  FOM
          150        1.2     12           0.04   0.4     347.129
          150        0.96    12           0.02   0.6     270.344
          300        0.6     12           0.02   0.8     163.972
          300        0.3     12           0.02   1       99.4541
          300        0.18    12           0.01   1       60.322
          300        0.12    12           0.01   1       36.5871
          300        0.12    12           0.01   1       22.1912
        Chemical
          Thickness  NO3N  NH4N  PH
          150        1     0.1   8
          150        1     0.1   8
          300        1     0.1   8
          300        1     0.1   8
          300        1     0.1   8
          300        1     0.1   8
          300        1     0.1   8
        InitialWater: PercentMethod=1; FractionFull=1
        Sample InitialN: Thickness=[150, 150, 300, 300, 300, 300, 300]; SWUnits=Volumetric; OCUnits=Total; PHUnits=Water
        CERESSoilTemperature Temperature
        Nutrient
      SurfaceOrganicMatter: InitialResidueName=wheat_stubble; InitialResidueType=wheat; InitialResidueMass=500; InitialStandingFraction=0; InitialCPR=0; InitialCNR=100
  DataStore
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