Simulations: Version=222
  DataStore
  Folder Replacements
    Report DailyReport: EventNames=[Clock].DoReport
      VariableNames:
        [Clock].Today
        [IWeather].Radn
        [IWeather].MeanT
        [Barley].Phenology.Photoperiod
        [Barley].Phenology.HaunStage
        ([Barley].Leaf.Transpiration + [Soil].SoilWater.Es + [MicroClimate].PrecipitationInterception) as ET
        [Barley].AboveGround.N
        [Barley].AboveGround.Wt
        [Barley].AboveGroundLive.N
        [Barley].AboveGroundLive.Wt
        [Barley].Ear.N
        [Barley].Ear.NConc
        [Barley].Ear.Wt
        [Barley].Grain.N
        [Barley].Grain.NConc
        [Barley].Grain.Number
        [Barley].Grain.Size
        [Barley].Grain.Wt
        [Barley].Leaf.CoverGreen
        [Barley].Leaf.CoverTotal
        [Barley].Leaf.Dead.Wt
        [Barley].Leaf.Ligules
        [Barley].Leaf.LAI
        [Barley].Leaf.Live.NConc
        [Barley].Leaf.Live.Wt
        [Barley].Leaf.SpecificArea
        [Barley].Leaf.SpecificAreaCanopy
        [Barley].AboveGround.NConc
        [Barley].Leaf.Live.N
        [Barley].Leaf.Wt
        [Barley].Stem.N
        [Barley].Phenology.AccumulatedEmergedTT
        [Barley].Phenology.CurrentStageName
        [Barley].Phenology.FlagLeafDAS
        [Barley].Phenology.FloweringDAS
        [Barley].Phenology.Stage
        [Barley].Phenology.Zadok.Stage
        [Barley].SowingData.Cultivar
        [Barley].Spike.Wt
        [Barley].Stem.NConc
        [Barley].Stem.Wt
        [Barley].Phenology.HaunStage
        [Barley].Leaf.Height
        [Barley].Leaf.Tips
        [Barley].Leaf.MainStemPopulation
        [Barley].Leaf.Fn
        [Barley].Leaf.Fw
        [Soil].Nutrient.MineralN
        [Soil].Water.Volumetric
        [Soil].Water.MM
        sum([Soil].Nutrient.MineralN) as ProfileN
        sum([Soil].Water.MM) as ProfileWater
    Report HarvestReport: EventNames=[Barley].Harvesting
      VariableNames:
        [Clock].Today
        [Barley].Phenology.CurrentPhase.Name
        [Barley].Phenology.CurrentStageName
        [Barley].Phenology.EmergenceDAS
        [Barley].Phenology.FlagLeafDAS
        [Barley].Phenology.FloweringDAS
        [Barley].Phenology.MaturityDAS
        [Barley].Grain.Wt
        [Barley].Grain.N
        [Barley].Grain.Number
        [Barley].Grain.NConc
        [Barley].AboveGround.Wt
        [Barley].AboveGround.N
        [Barley].Grain.Protein
        [Barley].Grain.Size
        [Barley].Phenology.HaunStage
        [Barley].Phenology.FinalLeafNumber
        [Barley].Leaf.MainStemPopulation
        [Barley].SowingData.Cultivar
        [Barley].SowingDate.DayOfYear
        [Clock].StartDate
    Manager Harvesting
```csharp
using Models.PMF.Phen;
using System;
using Models.Core;
using System.Collections.Generic;
using System.Text;
using Models.Soils;
using Models.PMF;
using Models;
using System.Xml.Serialization;
using APSIM.Shared.Utilities;

namespace Models
{
    [Serializable] 
    public class Script : Model
    {
        [Link] private Plant Barley;
        [Link(Type = LinkType.Path, Path = "[Barley].Phenology")]
        private Phenology phenology;
        [EventSubscribe("DoManagement")]
        private void OnDoManagement(object sender, EventArgs e)
        {
            if (phenology.CurrentPhase.Name == "Maturing")
            {
                Barley.Harvest();
                Barley.EndCrop();
            }
        }
    }
}
```
    Report SowingReport: EventNames=[Barley].Sowing
      VariableNames:
        [Clock].Today
        [Barley].SowingData.Cultivar
        [IWeather].Latitude
        [IWeather].Longitude
    Plant Barley: ResourceName=WinterCereal
      ModelOverrides
        Overrides=[[Barley].PlantType=Barley, [Phenology].Flowering.Target.FixedValue=0, [Phenology].HeadEmergenceLongDayBase.FixedValue = 140, [Phenology].HeadEmergencePpSensitivity.FixedValue = 0.33, , // observed maturity is physiological maturity: compare with end of grain fill, not HarvestRipe (WinterCereal default,, // GrainRipening 335 oCd later); the removed in-file Barley model set MaturityDAS at EndGrainFill + 35 oCd, [Phenology].MaturityDAS.SetEvent = EndGrainFill // HarvestRipe, , // underestimated biomass: increase the biomass supply, [Leaf].Photosynthesis.RUE.FixedValue=1.65 // 1.55 // 1.5 (release), , [Leaf].Photosynthesis.FW.XYPairs.X=0, 0.5, 1, [Leaf].Photosynthesis.FW.XYPairs.Y=0, 1,   1, , //[Leaf].Photosynthesis.FN.XYPairs.X=0, 0.5, 1, //[Leaf].Photosynthesis.FN.XYPairs.Y=0, 1,   1, [Leaf].Photosynthesis.FN.XYPairs.X = 0, 1, 1.5 // 0, 0.9, 1.5 // 0, 1, 1.5, [Leaf].Photosynthesis.FN.XYPairs.Y=0, 1,   1, , , // overestiamted green cover and total cover at early stages and LAI: lower leaf area dimensions (LAI, green and total cover), [Leaf].AreaLargestLeaf.FixedValue = 0.00185 // 0.0017 // 0.0016 // 0.002 (LAI bias +7% once tillering, shrinkage and early RelativeArea were revised), , // The AgeFactor has the effect of increasing leaf size from a minimum for the first leaf appeared to a maximum for leaves that appear soon after TerminalSpikelet (stage 5),, // and then decreasing again for leaves appearing between TerminalSpikelet and FlagLeaf (stage 6), //[Leaf].DMDemands.Structural.DeltaLAIPotential.Vegetative.Delta.RelativeArea.XYPairs.X= 3,   3.5, 4.0,  5.0,  6.0 // 3,   3.6,  4.2,  5.0 // stage, //[Leaf].DMDemands.Structural.DeltaLAIPotential.Vegetative.Delta.RelativeArea.XYPairs.Y= 0.1, 0.6, 0.8,  1.0,  0.4 // 0.1, 0.5,  1.0,  0.4, // [Leaf].DMDemands.Structural.DeltaLAIPotential.Vegetative.Delta.RelativeArea.XYPairs.X= 3,   3.1, 4.0,  5.0, 5.5,  6.0 // 3,   3.6,  4.2,  5.0 // stage, // [Leaf].DMDemands.Structural.DeltaLAIPotential.Vegetative.Delta.RelativeArea.XYPairs.Y= 0.1, 0.2, 0.4,  0.9, 1.0,  0.4 // 0.1, 0.5,  1.0,  0.4, , [Leaf].DMDemands.Structural.DeltaLAIPotential.Vegetative.Delta.RelativeArea.XYPairs.X= 3.0, 4.0,  5.0,  5.2,  6.0  // 3,   3.6,  4.2,  5.0 // stage, [Leaf].DMDemands.Structural.DeltaLAIPotential.Vegetative.Delta.RelativeArea.XYPairs.Y = 0.04, 0.1, 0.9, 1, 0.5 // 0.048, 0.12, 0.9,  1.0,  0.4 // 0.08, 0.2, 0.9,  1.0,  0.4 // 0.1, 0.25, 0.9,  1.0,  0.4 (cover +33% before TS) // 0.1, 0.4,  0.9,  1.0,  0.4 (LAI +23% before TS) // 0.1, 0.5,  1.0,  0.4, , // Extinction coefficient increases at early stages: exntiction coefficient increases at stem extension as leaves become more prostrate, // k = VegetativePhase + (EarlyValue(X = RowSpacing) − VegetativePhase)​ ​× DevelopmentFactor(X = Stage), // cover=1−e^(−k * LAI), [Leaf].ExtinctionCoefficient.EarlyIncrease.DevelopmentFactor.XYPairs.X= 3,    4,    4.5,  5,    5.5,   6 // 3, 4, 6 // stage, //[Leaf].ExtinctionCoefficient.EarlyIncrease.DevelopmentFactor.XYPairs.Y= 0.67, 0.60, 0.38, 0.20, 0.02,  0 // 1, 1, 0 // 0.6 (release), // 0.63,0.63,0.60,0.40,0.20,0 matched 14 paired early k obs (0.65) but over-predicted 108 early cover obs; original kept, [Leaf].ExtinctionCoefficient.EarlyIncrease.DevelopmentFactor.XYPairs.Y= 0.63, 0.56, 0.38, 0.20, 0.02,  0 // 0.63, 0.63, 0.60, 0.40, 0.20,  0 // 1, 1, 0, , , [Leaf].ExtinctionCoefficient.EarlyIncrease.Range.EarlyValue.XYPairs.X=150,  250,  500 // row spaceing, [Leaf].ExtinctionCoefficient.EarlyIncrease.Range.EarlyValue.XYPairs.Y = 0.576, 0.544, 0.48 // 0.72, 0.68, 0.6 // 0.9, 0.8, 0.7, , // observed k = -ln(1-CoverGreen)/LAI after flag leaf: median 0.53 (flag-anthesis), 0.48 (grain fill), [Leaf].ExtinctionCoefficient.VegetativePhase.FixedValue=0.56 // 0.54 // 0.5 // 0.6 (search capped at 0.56: paired-obs k 0.48-0.53 after flag leaf), , // LAI ∝ ΔLAIpot (leaf expansion) ​​​∝ AreaLargestLeaf × RelativeArea(X = Stage) × LAR × [ExpansionStress] (min(SWEffect, TempEffect, NEffect)), [Leaf].ExpansionStress.SWEffect.XYPairs.X= 0.6, 0.8, 0.9, 1 // 0.8, 1 //WaterTensionFactor, [Leaf].ExpansionStress.SWEffect.XYPairs.Y= 0,   0.3, 0.7, 1 // 0.5, 1, , //[Leaf].ExpansionStress.NitrogenEffect.XYPairs.X= 0.6, 0.8, 0.9, 1 // 0.8, 1 // fn, //[Leaf].ExpansionStress.NitrogenEffect.XYPairs.Y= 0,   0.3, 0.7, 1 // 0, 1, , , // SLA, // SpecificArea_realized = PotentialSpecificArea(x = LAI) × min(SWFactor, TemperatureFactor), //[Leaf].SpecificArea.Potential.XYPairs.X =0.25,   1.50,   3.50,    6.00    // 0,    1.5 // LAI, //[Leaf].SpecificArea.Potential.XYPairs.Y =0.0190, 0.0223, 0.02586, 0.03278 // 0.03, 0.03, , //[Leaf].SpecificArea.Potential.XYPairs.X =0.125,  0.375,  0.625,  0.875,  1.25,   1.75,   2.50,   3.50,   5.00,   7.00  // 0,    1.5 // LAI, //[Leaf].SpecificArea.Potential.XYPairs.Y =0.0200, 0.0210, 0.0215, 0.0220, 0.0225, 0.035, 0.035,  0.035,  0.035,  0.0350 // 0.03, 0.03, , [Leaf].SpecificArea.Potential.XYPairs.X =0,       4 // 0,     1.5 // LAI, [Leaf].SpecificArea.Potential.XYPairs.Y =0.02975, 0.035 // SLA 15% lower at low LAI raised SLA NSE without LAI loss // 0.035, 0.035 // 0.030 gave SLA bias 0 but LAI supply-limited (-12%); user chose LAI/cover over SLA // 0.03, 0.03, , , // water stress cause thicker leaf (lower SLA), [Leaf].SpecificArea.ReductionFactor.SWFactor.XYPairs.X = 0.6,  0.8,  1 // 0.8, 1 // WaterTensionFactor, [Leaf].SpecificArea.ReductionFactor.SWFactor.XYPairs.Y = 0.85, 0.95, 1 // 0.5, 1, , // temperature stress cause thicker leaf (lower SLA), //[Leaf].SpecificArea.ReductionFactor.TemperatureFactor.XYPairs.X= 5,   10,  15 // 5,  15 // weighted temperature, //[Leaf].SpecificArea.ReductionFactor.TemperatureFactor.XYPairs.Y= 0.3, 0.5, 1 // 0.5, 1, [Leaf].SpecificArea.ReductionFactor.TemperatureFactor.XYPairs.X= 5,   15 // WinterCereal default X, [Leaf].SpecificArea.ReductionFactor.TemperatureFactor.XYPairs.Y = 0.45, 1 // 0.4, 1  // 0.5, 1, , // vegetative (pre-flag) senescence: default X=1,5,8 Y=0,0,0.003 gave ~0 dead leaf vs obs 6 (stem elongation) and 25 g/m2 (flag-anthesis), [Leaf].SenescenceRate.Vegetative.Rate.ShadeSenescence.XYPairs.X = 0, 2.75, 6 // 0, 3, 6, [Leaf].SenescenceRate.Vegetative.Rate.ShadeSenescence.XYPairs.Y = 0, 0, 0.02, , // post-flag area shrinkage (area lost without mass over Heading+Flowering): grain-fill LAI -11%, SLA -16%, Live.Wt -6%, [Leaf].Area.Calculation.AccumulatedChange.AreaShrinkage.DeltaArea.Fraction.FixedValue = 0 // 0.05 // 0.1 // 0.2, , // dead leaf detachment: default 0 let dead leaf accumulate (Dead.Wt +39% at ripening), [Leaf].DetachmentRate.FixedValue = 0.01 // 0, , // grain-fill water-stress senescence: 0.15 at WTF 0 over-senesced (leaf NConc, CoverTotal); 0.05 lost CoverGreen, [Leaf].SenescenceRate.Reproductive.Rate.Fraction.WaterStress.XYPairs.X = 0,   0.5, 1, [Leaf].SenescenceRate.Reproductive.Rate.Fraction.WaterStress.XYPairs.Y = 0.125, 0, 0 // 0.15, 0, 0 // 0.1, 0,   0 // 0.15, 0, 0, , // dead leaf extinction coefficient: standing dead leaf keeps observed total cover ~0.95 in grain fill, [Leaf].KDead = 0.3 // 0.6; 0.3 is the WinterCereal and APSIM Classic barley/wheat dead-leaf value, , // tiller attrition 1.75x WinterCereal default (improved Leaf.Wt and Dead.Wt), [Leaf].StemNumberPerPlant.StemNumberPerPlant.DeadTillers.DailyTillerAttrition.TillerAttritionRate.XYPairs.X = 0,      0.002, 0.003, 0.004, [Leaf].StemNumberPerPlant.StemNumberPerPlant.DeadTillers.DailyTillerAttrition.TillerAttritionRate.XYPairs.Y = 0.06, 0.04, 0, 0 // 0.0525, 0.035, 0,     0 // 0.03, 0.02, 0, 0, , // shoot counts (RS1995_96, ABlock99_00) are 35-40% above predicted stems at all densities: tillering stopped too early, [Leaf].TilleringRate.Vegetative.StressedRate.Stresses.CoverEffect.XYPairs.X=0, 0.55, 0.95 // 0, 0.35, 0.5, [Leaf].TilleringRate.Vegetative.StressedRate.Stresses.CoverEffect.XYPairs.Y=1, 1,    0    // 1, 1,    0, , , // leaf N: N150 leaf NConc sat at MaximumNConc (0.035 at stage 9.5) vs obs 0.023 in grain fill; obs N150 envelope 0.047 (<TS), 0.039 (flag), 0.027 (grain fill), // kept above CriticalNConc (WinterCereal: X=3,4,5,6,7,8 Y=0.043,0.043,0.04,0.028,0.02,0.015) at every stage, [Leaf].MaximumNConc.XYPairs.X = 3,    4.5,   6,    8,    9.5,   11 // 3,    4.5,  5.5,   9.5,   11, [Leaf].CriticalNConc.CriticalNConcAt350ppm.XYPairs.Y = 0.04085, 0.04085, 0.038, 0.0266, 0.019, 0.01425 // 0.03655, 0.03655, 0.034, 0.0238, 0.017, 0.01275 // WinterCereal x0.85: 0.043, 0.043, 0.04, 0.028, 0.02, 0.015, [Leaf].MaximumNConc.XYPairs.Y = 0.05, 0.045, 0.035, 0.028, 0.022, 0.005 // 0.05, 0.045, 0.04, 0.03, 0.022, 0.005 // 0.06, 0.06, 0.045, 0.035, 0.005, , [Leaf].ExpansionStress.NitrogenEffect.XYPairs.X = 0.8, 1, 3, [Leaf].ExpansionStress.NitrogenEffect.XYPairs.Y = 0, 1, 1, [Leaf].TilleringRate.Vegetative.StressedRate.PotentialtilleringRate.SpeciesUpperLimit.XYPairs.X = 2, 2.5, 3.5, 4.5, 5.5, 6.5, [Leaf].TilleringRate.Vegetative.StressedRate.PotentialtilleringRate.SpeciesUpperLimit.XYPairs.Y = 0, 1, 2, 3, 5, 8, [Leaf].TilleringRate.Vegetative.StressedRate.PotentialtilleringRate.GenotypeTilleringTendency.FixedValue = 1, [Leaf].SenescenceRate.Reproductive.Rate.Upper.FixedValue = 0.035 // 0.05, [Leaf].SenescenceRate.Reproductive.Rate.Fraction.Aging.Modifier.FixedValue = 70, [Leaf].SenescenceRate.GrainFilling.Rate.Fraction.Aging.Modifier.FixedValue = 1 // 0.875 // 1, [Leaf].NRetranslocationFactor.FixedValue = 0.03, , [Stem].PotentialGrowth.PartitionFraction.StemElongating.StemFraction.FixedValue = 0.7, [Spike].PotentialGrowth.EmergenceToRapidGrainFill.PotentialGrowth.TargetWt.SpikeFraction.XYPairs.Y = 0, 0, 0.03, 0.165, 0.165, 0.165, [Stem].PotentialGrowth.PartitionFraction.EarEmergence.StemFraction.FixedValue = 0.5, [Stem].DMRetranslocationFactor.ReproductiveGrowth.DMRetranslocationFactor.FixedValue = 1, , [Grain].MaximumPotentialGrainSize.FixedValue = 0.0525 // 0.055, [Grain].NumberFunction.GrainNumber.GrainsPerGramOfStem.FixedValue=35]
      Folder Cultivars1
        Cultivar Alestar_org
          Command:
            [Phenology].CAMP.FLNparams.MinLN = 9
            [Phenology].CAMP.FLNparams.PpLN = -3
            [Phenology].CAMP.FLNparams.VrnLN = 6
            [Phenology].CAMP.FLNparams.VxPLN = -7
            [Phenology].Phyllochron.BasePhyllochron.FixedValue = 120.9431217
            [Phenology].PhyllochronPpSensitivity.FixedValue = 0.207440505
            [Phenology].CAMP.EnvData.VrnTreatTemp = 5.8
            [Phenology].HeadEmergenceLongDayBase.FixedValue = 50
            [Phenology].HeadEmergencePpSensitivity.FixedValue = 0
        Cultivar Banks_org
          Command:
            [Phenology].CAMP.FLNparams.MinLN = 8
            [Phenology].CAMP.FLNparams.PpLN = -2
            [Phenology].CAMP.FLNparams.VrnLN = 4
            [Phenology].CAMP.FLNparams.VxPLN = -6
            [Phenology].Phyllochron.BasePhyllochron.FixedValue = 120.3588019
            [Phenology].PhyllochronPpSensitivity.FixedValue = 0.23234103
            [Phenology].CAMP.EnvData.VrnTreatTemp = 5.8
            [Phenology].HeadEmergenceLongDayBase.FixedValue = 70
            [Phenology].HeadEmergencePpSensitivity.FixedValue = 2
        Cultivar Bass_org
          Command:
            [Phenology].CAMP.FLNparams.MinLN = 8.333333333
            [Phenology].CAMP.FLNparams.PpLN = -2.333333333
            [Phenology].CAMP.FLNparams.VrnLN = 4
            [Phenology].CAMP.FLNparams.VxPLN = -3.333333333
            [Phenology].Phyllochron.BasePhyllochron.FixedValue = 110.9847693
            [Phenology].PhyllochronPpSensitivity.FixedValue = 0.261968924
            [Phenology].CAMP.EnvData.VrnTreatTemp = 5.8
            [Phenology].HeadEmergenceLongDayBase.FixedValue = 50
            [Phenology].HeadEmergencePpSensitivity.FixedValue = 2
        Cultivar Baudin_org
          Command:
            [Phenology].CAMP.FLNparams.MinLN = 7.333333333
            [Phenology].CAMP.FLNparams.PpLN = 3.666666667
            [Phenology].CAMP.FLNparams.VrnLN = 2
            [Phenology].CAMP.FLNparams.VxPLN = -1.333333333
            [Phenology].Phyllochron.BasePhyllochron.FixedValue = 69.95241059
            [Phenology].PhyllochronPpSensitivity.FixedValue = 0.748224618
            [Phenology].CAMP.EnvData.VrnTreatTemp = 5.8
            [Phenology].HeadEmergenceLongDayBase.FixedValue = 50
            [Phenology].HeadEmergencePpSensitivity.FixedValue = 6
        Cultivar Biere_org
          Command:
            [Phenology].CAMP.FLNparams.MinLN = 8.333333333
            [Phenology].CAMP.FLNparams.PpLN = -2.333333333
            [Phenology].CAMP.FLNparams.VrnLN = 0
            [Phenology].CAMP.FLNparams.VxPLN = -2.333333333
            [Phenology].Phyllochron.BasePhyllochron.FixedValue = 118.6729904
            [Phenology].PhyllochronPpSensitivity.FixedValue = 0.182591106
            [Phenology].CAMP.EnvData.VrnTreatTemp = 5.8
            [Phenology].HeadEmergenceLongDayBase.FixedValue = 50
            [Phenology].HeadEmergencePpSensitivity.FixedValue = 4
        Cultivar Buloke_org
          Command:
            [Phenology].CAMP.FLNparams.MinLN = 9
            [Phenology].CAMP.FLNparams.PpLN = 4
            [Phenology].CAMP.FLNparams.VrnLN = 0
            [Phenology].CAMP.FLNparams.VxPLN = 0
            [Phenology].Phyllochron.BasePhyllochron.FixedValue = 85
            [Phenology].PhyllochronPpSensitivity.FixedValue = 1.1
            [Phenology].CAMP.EnvData.VrnTreatTemp = 5.8
        Cultivar Bumpa
          Command:
            [Phenology].CAMP.FLNparams.MinLN = 9
            [Phenology].CAMP.FLNparams.PpLN = 3
            [Phenology].CAMP.FLNparams.VrnLN = 0
            [Phenology].CAMP.FLNparams.VxPLN = 0
            [Phenology].Phyllochron.BasePhyllochron.FixedValue = 59.1603
            [Phenology].PhyllochronPpSensitivity.FixedValue = 1.1
            [Phenology].CAMP.EnvData.VrnTreatTemp = 5.8
            [Phenology].HeadEmergenceLongDayBase.FixedValue = 190
            [Phenology].HeadEmergencePpSensitivity.FixedValue = 0.33
            [Phenology].GrainFilling.Target.FixedValue = 545
        Cultivar Capstan_org
          Command:
            [Phenology].CAMP.FLNparams.MinLN = 8
            [Phenology].CAMP.FLNparams.PpLN = 4
            [Phenology].CAMP.FLNparams.VrnLN = 0
            [Phenology].CAMP.FLNparams.VxPLN = -2
            [Phenology].Phyllochron.BasePhyllochron.FixedValue = 87.44227888
            [Phenology].PhyllochronPpSensitivity.FixedValue = 0.655991185
            [Phenology].CAMP.EnvData.VrnTreatTemp = 5.8
            [Phenology].HeadEmergenceLongDayBase.FixedValue = 50
            [Phenology].HeadEmergencePpSensitivity.FixedValue = 5
        Cultivar Cassiopee
          Command:
            [Phenology].CAMP.FLNparams.MinLN = 11.208333 // 11.33333333
            [Phenology].CAMP.FLNparams.PpLN = -0.33333333
            [Phenology].CAMP.FLNparams.VrnLN = 15 // 14
            [Phenology].CAMP.FLNparams.VxPLN = -14.33333333
            [Phenology].Phyllochron.BasePhyllochron.FixedValue = 111.760502
            [Phenology].PhyllochronPpSensitivity.FixedValue = 0.004655 // 0.154654968
            [Phenology].CAMP.EnvData.VrnTreatTemp = 5.8
            [Phenology].HeadEmergenceLongDayBase.FixedValue = 45 // 50
            [Phenology].HeadEmergencePpSensitivity.FixedValue = 0
        Cultivar Commander_org
          Command:
            [Phenology].CAMP.FLNparams.MinLN = 7.666666667
            [Phenology].CAMP.FLNparams.PpLN = 2.333333333
            [Phenology].CAMP.FLNparams.VrnLN = 4
            [Phenology].CAMP.FLNparams.VxPLN = -5.666666667
            [Phenology].Phyllochron.BasePhyllochron.FixedValue = 96.92081575
            [Phenology].PhyllochronPpSensitivity.FixedValue = 0.369052131
            [Phenology].CAMP.EnvData.VrnTreatTemp = 5.8
            [Phenology].HeadEmergenceLongDayBase.FixedValue = 50
            [Phenology].HeadEmergencePpSensitivity.FixedValue = 1
        Cultivar Compass_org
          Command:
            [Phenology].CAMP.FLNparams.MinLN = 9
            [Phenology].CAMP.FLNparams.PpLN = -3
            [Phenology].CAMP.FLNparams.VrnLN = 5
            [Phenology].CAMP.FLNparams.VxPLN = -5
            [Phenology].Phyllochron.BasePhyllochron.FixedValue = 104.3258054
            [Phenology].PhyllochronPpSensitivity.FixedValue = 0.246502671
            [Phenology].CAMP.EnvData.VrnTreatTemp = 5.8
            [Phenology].HeadEmergenceLongDayBase.FixedValue = 50
            [Phenology].HeadEmergencePpSensitivity.FixedValue = 0
        Cultivar Csirob1_org
          Command:
            [Phenology].CAMP.FLNparams.MinLN = 7.333333333
            [Phenology].CAMP.FLNparams.PpLN = 0.666666667
            [Phenology].CAMP.FLNparams.VrnLN = 5
            [Phenology].CAMP.FLNparams.VxPLN = -3.333333333
            [Phenology].Phyllochron.BasePhyllochron.FixedValue = 76.78280555
            [Phenology].PhyllochronPpSensitivity.FixedValue = 0.619292867
            [Phenology].CAMP.EnvData.VrnTreatTemp = 5.8
            [Phenology].HeadEmergenceLongDayBase.FixedValue = 90
            [Phenology].HeadEmergencePpSensitivity.FixedValue = 6
        Cultivar Csirob3_org
          Command:
            [Phenology].CAMP.FLNparams.MinLN = 6
            [Phenology].CAMP.FLNparams.PpLN = 4
            [Phenology].CAMP.FLNparams.VrnLN = 0
            [Phenology].CAMP.FLNparams.VxPLN = 0
            [Phenology].Phyllochron.BasePhyllochron.FixedValue = 57.45009872
            [Phenology].PhyllochronPpSensitivity.FixedValue = 1.18910351
            [Phenology].CAMP.EnvData.VrnTreatTemp = 5.8
            [Phenology].HeadEmergenceLongDayBase.FixedValue = 50
            [Phenology].HeadEmergencePpSensitivity.FixedValue = 4
        Cultivar Fathom_org
          Command:
            [Phenology].CAMP.FLNparams.MinLN = 6
            [Phenology].CAMP.FLNparams.PpLN = 5
            [Phenology].CAMP.FLNparams.VrnLN = 7
            [Phenology].CAMP.FLNparams.VxPLN = -6
            [Phenology].Phyllochron.BasePhyllochron.FixedValue = 82.17586355
            [Phenology].PhyllochronPpSensitivity.FixedValue = 0.85248787
            [Phenology].CAMP.EnvData.VrnTreatTemp = 5.8
            [Phenology].HeadEmergenceLongDayBase.FixedValue = 50
            [Phenology].HeadEmergencePpSensitivity.FixedValue = 1
        Cultivar Fleet_org
          Command:
            [Phenology].CAMP.FLNparams.MinLN = 8
            [Phenology].CAMP.FLNparams.PpLN = 3
            [Phenology].CAMP.FLNparams.VrnLN = 0
            [Phenology].CAMP.FLNparams.VxPLN = -2
            [Phenology].Phyllochron.BasePhyllochron.FixedValue = 90.88228131
            [Phenology].PhyllochronPpSensitivity.FixedValue = 0.4688122
            [Phenology].CAMP.EnvData.VrnTreatTemp = 5.8
            [Phenology].HeadEmergenceLongDayBase.FixedValue = 50
            [Phenology].HeadEmergencePpSensitivity.FixedValue = 2
        Cultivar Flinders_org
          Command:
            [Phenology].CAMP.FLNparams.MinLN = 8.333333333
            [Phenology].CAMP.FLNparams.PpLN = -2.333333333
            [Phenology].CAMP.FLNparams.VrnLN = 5
            [Phenology].CAMP.FLNparams.VxPLN = -7.333333333
            [Phenology].Phyllochron.BasePhyllochron.FixedValue = 129.3942158
            [Phenology].PhyllochronPpSensitivity.FixedValue = 0.105323488
            [Phenology].CAMP.EnvData.VrnTreatTemp = 5.8
            [Phenology].HeadEmergenceLongDayBase.FixedValue = 70
            [Phenology].HeadEmergencePpSensitivity.FixedValue = 1
        Cultivar Franklin_org
          Command:
            [Phenology].CAMP.FLNparams.MinLN = 10
            [Phenology].CAMP.FLNparams.PpLN = -2
            [Phenology].CAMP.FLNparams.VrnLN = 5
            [Phenology].CAMP.FLNparams.VxPLN = -7
            [Phenology].Phyllochron.BasePhyllochron.FixedValue = 103.9731331
            [Phenology].PhyllochronPpSensitivity.FixedValue = 0.195075087
            [Phenology].CAMP.EnvData.VrnTreatTemp = 5.8
            [Phenology].HeadEmergenceLongDayBase.FixedValue = 50
            [Phenology].HeadEmergencePpSensitivity.FixedValue = 7
        Cultivar Gairdner_org
          Command:
            [Phenology].CAMP.FLNparams.MinLN = 10
            [Phenology].CAMP.FLNparams.PpLN = 0
            [Phenology].CAMP.FLNparams.VrnLN = 4
            [Phenology].CAMP.FLNparams.VxPLN = -5
            [Phenology].Phyllochron.BasePhyllochron.FixedValue = 88.54255431
            [Phenology].PhyllochronPpSensitivity.FixedValue = 0.325049926
            [Phenology].CAMP.EnvData.VrnTreatTemp = 5.8
            [Phenology].HeadEmergenceLongDayBase.FixedValue = 50
            [Phenology].HeadEmergencePpSensitivity.FixedValue = 2
        Cultivar Granger_org
          Command:
            [Phenology].CAMP.FLNparams.MinLN = 9
            [Phenology].CAMP.FLNparams.PpLN = 2
            [Phenology].CAMP.FLNparams.VrnLN = 0
            [Phenology].CAMP.FLNparams.VxPLN = -3
            [Phenology].Phyllochron.BasePhyllochron.FixedValue = 108.6702997
            [Phenology].PhyllochronPpSensitivity.FixedValue = 0.190962591
            [Phenology].CAMP.EnvData.VrnTreatTemp = 5.8
            [Phenology].HeadEmergenceLongDayBase.FixedValue = 50
            [Phenology].HeadEmergencePpSensitivity.FixedValue = 0
        Cultivar Grimmett
          Command:
            [Phenology].CAMP.FLNparams.MinLN = 8.5 // 9
            [Phenology].CAMP.FLNparams.PpLN = 5
            [Phenology].CAMP.FLNparams.VrnLN = 0.5 // 0
            [Phenology].CAMP.FLNparams.VxPLN = 0
            [Phenology].Phyllochron.BasePhyllochron.FixedValue = 80 // 60
            [Phenology].PhyllochronPpSensitivity.FixedValue = 1.1
            [Phenology].CAMP.EnvData.VrnTreatTemp = 5.8
            [Phenology].HeadEmergenceLongDayBase.FixedValue = 145 // 140
        Cultivar Grout_org
          Command:
            [Phenology].CAMP.FLNparams.MinLN = 7.333333333
            [Phenology].CAMP.FLNparams.PpLN = 2.666666667
            [Phenology].CAMP.FLNparams.VrnLN = 0
            [Phenology].CAMP.FLNparams.VxPLN = -1.333333333
            [Phenology].Phyllochron.BasePhyllochron.FixedValue = 86.48989044
            [Phenology].PhyllochronPpSensitivity.FixedValue = 0.62631665
            [Phenology].CAMP.EnvData.VrnTreatTemp = 5.8
            [Phenology].HeadEmergenceLongDayBase.FixedValue = 50
            [Phenology].HeadEmergencePpSensitivity.FixedValue = 3
        Cultivar Hindmarsh_org: same as Replacements.Barley.Cultivars1.Buloke_org
        Cultivar Keel_org
          Command:
            [Phenology].CAMP.FLNparams.MinLN = 6
            [Phenology].CAMP.FLNparams.PpLN = 4
            [Phenology].CAMP.FLNparams.VrnLN = 1
            [Phenology].CAMP.FLNparams.VxPLN = -1
            [Phenology].Phyllochron.BasePhyllochron.FixedValue = 58.40056656
            [Phenology].PhyllochronPpSensitivity.FixedValue = 1.251746574
            [Phenology].CAMP.EnvData.VrnTreatTemp = 5.8
            [Phenology].HeadEmergenceLongDayBase.FixedValue = 70
            [Phenology].HeadEmergencePpSensitivity.FixedValue = 7
        Cultivar Lockyer_org
          Command:
            [Phenology].CAMP.FLNparams.MinLN = 6.666666667
            [Phenology].CAMP.FLNparams.PpLN = 3.333333333
            [Phenology].CAMP.FLNparams.VrnLN = 10
            [Phenology].CAMP.FLNparams.VxPLN = -10.666666667
            [Phenology].Phyllochron.BasePhyllochron.FixedValue = 97.89121109
            [Phenology].PhyllochronPpSensitivity.FixedValue = 0.405093218
            [Phenology].CAMP.EnvData.VrnTreatTemp = 5.8
            [Phenology].HeadEmergenceLongDayBase.FixedValue = 70
            [Phenology].HeadEmergencePpSensitivity.FixedValue = 1
        Cultivar Mundah_org
          Command:
            [Phenology].CAMP.FLNparams.MinLN = 9
            [Phenology].CAMP.FLNparams.PpLN = 1
            [Phenology].CAMP.FLNparams.VrnLN = 0
            [Phenology].CAMP.FLNparams.VxPLN = -1
            [Phenology].Phyllochron.BasePhyllochron.FixedValue = 99.85179413
            [Phenology].PhyllochronPpSensitivity.FixedValue = 0.253014157
            [Phenology].CAMP.EnvData.VrnTreatTemp = 5.8
            [Phenology].HeadEmergenceLongDayBase.FixedValue = 110
            [Phenology].HeadEmergencePpSensitivity.FixedValue = 7
        Cultivar Navigator_org
          Command:
            [Phenology].CAMP.FLNparams.MinLN = 8
            [Phenology].CAMP.FLNparams.PpLN = 4
            [Phenology].CAMP.FLNparams.VrnLN = 5
            [Phenology].CAMP.FLNparams.VxPLN = -7
            [Phenology].Phyllochron.BasePhyllochron.FixedValue = 93.43659898
            [Phenology].PhyllochronPpSensitivity.FixedValue = 0.400967405
            [Phenology].CAMP.EnvData.VrnTreatTemp = 5.8
            [Phenology].HeadEmergenceLongDayBase.FixedValue = 50
            [Phenology].HeadEmergencePpSensitivity.FixedValue = 1
        Cultivar Omaka1
          Command:
            [Phenology].CAMP.FLNparams.MinLN = 9
            [Phenology].CAMP.FLNparams.PpLN = 3
            [Phenology].CAMP.FLNparams.VrnLN = 0
            [Phenology].CAMP.FLNparams.VxPLN = 0
            [Phenology].Phyllochron.BasePhyllochron.FixedValue = 59.1603
            [Phenology].PhyllochronPpSensitivity.FixedValue = 1.1
            [Phenology].CAMP.EnvData.VrnTreatTemp = 5.8
        Cultivar Oxford_org
          Command:
            [Phenology].CAMP.FLNparams.MinLN = 9.666666667
            [Phenology].CAMP.FLNparams.PpLN = -3.666666667
            [Phenology].CAMP.FLNparams.VrnLN = 3
            [Phenology].CAMP.FLNparams.VxPLN = -6.666666667
            [Phenology].Phyllochron.BasePhyllochron.FixedValue = 139.8064143
            [Phenology].PhyllochronPpSensitivity.FixedValue = 0.107968397
            [Phenology].CAMP.EnvData.VrnTreatTemp = 5.8
            [Phenology].HeadEmergenceLongDayBase.FixedValue = 50
            [Phenology].HeadEmergencePpSensitivity.FixedValue = 1
        Cultivar Planet_org
          Command:
            [Phenology].CAMP.FLNparams.MinLN = 9
            [Phenology].CAMP.FLNparams.PpLN = 1
            [Phenology].CAMP.FLNparams.VrnLN = 0
            [Phenology].CAMP.FLNparams.VxPLN = -1
            [Phenology].Phyllochron.BasePhyllochron.FixedValue = 117.2869488
            [Phenology].PhyllochronPpSensitivity.FixedValue = 0.244404645
            [Phenology].CAMP.EnvData.VrnTreatTemp = 5.8
            [Phenology].HeadEmergenceLongDayBase.FixedValue = 70
            [Phenology].HeadEmergencePpSensitivity.FixedValue = 6
        Cultivar Rosalind_org
          Command:
            [Phenology].CAMP.FLNparams.MinLN = 9
            [Phenology].CAMP.FLNparams.PpLN = -3
            [Phenology].CAMP.FLNparams.VrnLN = 6
            [Phenology].CAMP.FLNparams.VxPLN = -9
            [Phenology].Phyllochron.BasePhyllochron.FixedValue = 113.0837881
            [Phenology].PhyllochronPpSensitivity.FixedValue = 0.350857209
            [Phenology].CAMP.EnvData.VrnTreatTemp = 5.8
            [Phenology].HeadEmergenceLongDayBase.FixedValue = 50
            [Phenology].HeadEmergencePpSensitivity.FixedValue = 0
        Cultivar Schooner_org
          Command:
            [Phenology].CAMP.FLNparams.MinLN = 8
            [Phenology].CAMP.FLNparams.PpLN = 1
            [Phenology].CAMP.FLNparams.VrnLN = 0
            [Phenology].CAMP.FLNparams.VxPLN = -2
            [Phenology].Phyllochron.BasePhyllochron.FixedValue = 90.27490591
            [Phenology].PhyllochronPpSensitivity.FixedValue = 0.517492533
            [Phenology].CAMP.EnvData.VrnTreatTemp = 5.8
            [Phenology].HeadEmergenceLongDayBase.FixedValue = 50
            [Phenology].HeadEmergencePpSensitivity.FixedValue = 7
        Cultivar Scope_org
          Command:
            [Phenology].CAMP.FLNparams.MinLN = 8
            [Phenology].CAMP.FLNparams.PpLN = 2
            [Phenology].CAMP.FLNparams.VrnLN = 0
            [Phenology].CAMP.FLNparams.VxPLN = 1
            [Phenology].Phyllochron.BasePhyllochron.FixedValue = 93.40444263
            [Phenology].PhyllochronPpSensitivity.FixedValue = 0.379146059
            [Phenology].CAMP.EnvData.VrnTreatTemp = 5.8
            [Phenology].HeadEmergenceLongDayBase.FixedValue = 50
            [Phenology].HeadEmergencePpSensitivity.FixedValue = 5
        Cultivar Shepherd_org
          Command:
            [Phenology].CAMP.FLNparams.MinLN = 9
            [Phenology].CAMP.FLNparams.PpLN = -3
            [Phenology].CAMP.FLNparams.VrnLN = 6
            [Phenology].CAMP.FLNparams.VxPLN = -9
            [Phenology].Phyllochron.BasePhyllochron.FixedValue = 123.1871156
            [Phenology].PhyllochronPpSensitivity.FixedValue = 0.106688704
            [Phenology].CAMP.EnvData.VrnTreatTemp = 5.8
            [Phenology].HeadEmergenceLongDayBase.FixedValue = 50
            [Phenology].HeadEmergencePpSensitivity.FixedValue = 0
        Cultivar Spartacus
          Command:
            [Phenology].CAMP.FLNparams.MinLN = 7.875 // 6
            [Phenology].CAMP.FLNparams.PpLN = 4.25 // 1
            [Phenology].CAMP.FLNparams.VrnLN = 3.5 // 4
            [Phenology].CAMP.FLNparams.VxPLN = -4
            [Phenology].Phyllochron.BasePhyllochron.FixedValue = 81.109513 // 96.10951301
            [Phenology].PhyllochronPpSensitivity.FixedValue = 0.435320697
            [Phenology].CAMP.EnvData.VrnTreatTemp = 5.8
            [Phenology].HeadEmergenceLongDayBase.FixedValue = 35 // 130
            [Phenology].HeadEmergencePpSensitivity.FixedValue = 6.75 // 7
        Cultivar Stirling_org
          Command:
            [Phenology].CAMP.FLNparams.MinLN = 8
            [Phenology].CAMP.FLNparams.PpLN = 3
            [Phenology].CAMP.FLNparams.VrnLN = 0
            [Phenology].CAMP.FLNparams.VxPLN = -2
            [Phenology].Phyllochron.BasePhyllochron.FixedValue = 76.70827864
            [Phenology].PhyllochronPpSensitivity.FixedValue = 0.636329125
            [Phenology].CAMP.EnvData.VrnTreatTemp = 5.8
            [Phenology].HeadEmergenceLongDayBase.FixedValue = 50
            [Phenology].HeadEmergencePpSensitivity.FixedValue = 4
        Cultivar Unicorn
          Command:
            [Phenology].CAMP.FLNparams.MinLN = 7
            [Phenology].CAMP.FLNparams.PpLN = 3.5 // 4
            [Phenology].CAMP.FLNparams.VrnLN = 0
            [Phenology].CAMP.FLNparams.VxPLN = -1
            [Phenology].Phyllochron.BasePhyllochron.FixedValue = 79.288012 // 74.28801183
            [Phenology].PhyllochronPpSensitivity.FixedValue = 0.756480172
            [Phenology].CAMP.EnvData.VrnTreatTemp = 5.8
            [Phenology].HeadEmergenceLongDayBase.FixedValue = 40 // 110
            [Phenology].HeadEmergencePpSensitivity.FixedValue = 7
        Cultivar Urambie_org
          Command:
            [Phenology].CAMP.FLNparams.MinLN = 9.666666667
            [Phenology].CAMP.FLNparams.PpLN = -1.666666667
            [Phenology].CAMP.FLNparams.VrnLN = 14
            [Phenology].CAMP.FLNparams.VxPLN = -4.666666667
            [Phenology].Phyllochron.BasePhyllochron.FixedValue = 112.8025962
            [Phenology].PhyllochronPpSensitivity.FixedValue = 0.103185899
            [Phenology].CAMP.EnvData.VrnTreatTemp = 5.8
            [Phenology].HeadEmergenceLongDayBase.FixedValue = 50
            [Phenology].HeadEmergencePpSensitivity.FixedValue = 0
        Cultivar Valetta
          Command:
            [Phenology].CAMP.FLNparams.MinLN = 7.75 // 9
            [Phenology].CAMP.FLNparams.PpLN = 5.5 // 3
            [Phenology].CAMP.FLNparams.VrnLN = 0
            [Phenology].CAMP.FLNparams.VxPLN = 0
            [Phenology].Phyllochron.BasePhyllochron.FixedValue = 87.5 // 59.1603
            [Phenology].PhyllochronPpSensitivity.FixedValue = 1.6 // 1.1
            [Phenology].CAMP.EnvData.VrnTreatTemp = 5.8
            [Phenology].HeadEmergenceLongDayBase.FixedValue = 115
            [Phenology].HeadEmergencePpSensitivity.FixedValue = 0.33
            [Phenology].GrainFilling.Target.FixedValue = 545
        Cultivar Westminster_org
          Command:
            [Phenology].CAMP.FLNparams.MinLN = 9
            [Phenology].CAMP.FLNparams.PpLN = -3
            [Phenology].CAMP.FLNparams.VrnLN = 7
            [Phenology].CAMP.FLNparams.VxPLN = -10
            [Phenology].Phyllochron.BasePhyllochron.FixedValue = 130.4668887
            [Phenology].PhyllochronPpSensitivity.FixedValue = 0.146837949
            [Phenology].CAMP.EnvData.VrnTreatTemp = 5.8
            [Phenology].HeadEmergenceLongDayBase.FixedValue = 50
            [Phenology].HeadEmergencePpSensitivity.FixedValue = 1
        Cultivar Yagan_org
          Command:
            [Phenology].CAMP.FLNparams.MinLN = 7
            [Phenology].CAMP.FLNparams.PpLN = 3
            [Phenology].CAMP.FLNparams.VrnLN = 1
            [Phenology].CAMP.FLNparams.VxPLN = -2
            [Phenology].Phyllochron.BasePhyllochron.FixedValue = 99.45937465
            [Phenology].PhyllochronPpSensitivity.FixedValue = 0.396778567
            [Phenology].CAMP.EnvData.VrnTreatTemp = 5.8
            [Phenology].HeadEmergenceLongDayBase.FixedValue = 190
            [Phenology].HeadEmergencePpSensitivity.FixedValue = 7
        Folder Argentina
          Cultivar Andreia
            Command:
              [Phenology].MinimumLeafNumber.FixedValue = 9
              [Structure].Phyllochron.BasePhyllochron.FixedValue = 60
              [Phenology].PpSensitivity.FixedValue = 1
              [Phenology].VrnSensitivity.FixedValue = 1
              [Phenology].GrainFilling.Target.FixedValue = 550
              [Photosynthesis].RUE.FixedValue = 2.8
              [Grain].NumberFunction.GrainNumber.GrainsPerGramOfStem.FixedValue = 27
              [Structure].BranchMortality.MortalityPhase.Mortality.MortalityPerDegDay.XYPairs.Y = 0.001,0
              [Leaf].ExtinctionCoeff.FixedValue= 0.60
              [Grain].MaximumPotentialGrainSize.FixedValue = 0.045
              [Leaf].CohortParameters.GrowthDuration.Multiplier.FixedValue = 1.5
      Folder FittedCultivars
        Cultivar Booma
          Command:
            [Phenology].CAMP.FLNparams.MinLN = 8 // 9
            [Phenology].CAMP.FLNparams.PpLN = 6
            [Phenology].CAMP.FLNparams.VrnLN = 0
            [Phenology].CAMP.FLNparams.VxPLN = 0
            [Phenology].Phyllochron.BasePhyllochron.FixedValue = 80 // 85 // 95 // 85
            [Phenology].PhyllochronPpSensitivity.FixedValue = 2
            [Phenology].CAMP.EnvData.VrnTreatTemp = 5.8
            [Phenology].HeadEmergenceLongDayBase.FixedValue = 120 // 140
            [Phenology].HeadEmergencePpSensitivity.FixedValue = 0.33
            [Phenology].GrainFilling.Target.FixedValue = 545
        Cultivar Boss
          Command:
            [Phenology].CAMP.FLNparams.MinLN = 9 // 8.5
            [Phenology].CAMP.FLNparams.PpLN = 5
            [Phenology].CAMP.FLNparams.VrnLN = 0
            [Phenology].CAMP.FLNparams.VxPLN = 0
            [Phenology].Phyllochron.BasePhyllochron.FixedValue = 80
            [Phenology].PhyllochronPpSensitivity.FixedValue = 2
            [Phenology].CAMP.EnvData.VrnTreatTemp = 5.8
            [Phenology].HeadEmergenceLongDayBase.FixedValue = 120 // default 140
        Cultivar Doyen
          Command:
            [Phenology].CAMP.FLNparams.MinLN = 7
            [Phenology].CAMP.FLNparams.PpLN = 5
            [Phenology].CAMP.FLNparams.VrnLN = 0
            [Phenology].CAMP.FLNparams.VxPLN = 0
            [Phenology].Phyllochron.BasePhyllochron.FixedValue = 85
            [Phenology].PhyllochronPpSensitivity.FixedValue = 2
            [Phenology].CAMP.EnvData.VrnTreatTemp = 5.8
            [Phenology].HeadEmergenceLongDayBase.FixedValue = 170 // default 140
            [Phenology].HeadEmergencePpSensitivity.FixedValue = 0.08 // default 0.33
        Cultivar Hooded
          Command:
            [Phenology].CAMP.FLNparams.MinLN = 8 // 9
            [Phenology].CAMP.FLNparams.PpLN = 0 // 6
            [Phenology].CAMP.FLNparams.VrnLN = 2 // 0
            [Phenology].CAMP.FLNparams.VxPLN = 0
            [Phenology].Phyllochron.BasePhyllochron.FixedValue = 87.5 // 85
            [Phenology].PhyllochronPpSensitivity.FixedValue = 0.025 // 2
            [Phenology].CAMP.EnvData.VrnTreatTemp = 5.8
            [Phenology].HeadEmergenceLongDayBase.FixedValue = 40 // 140
            [Phenology].HeadEmergencePpSensitivity.FixedValue = 5
            [Phenology].GrainFilling.Target.FixedValue = 545
        Cultivar Optic
          Command:
            [Phenology].CAMP.FLNparams.MinLN = 7.75 // 7.5
            [Phenology].CAMP.FLNparams.PpLN = 5.5
            [Phenology].CAMP.FLNparams.VrnLN = 0
            [Phenology].CAMP.FLNparams.VxPLN = 0
            [Phenology].Phyllochron.BasePhyllochron.FixedValue = 85
            [Phenology].PhyllochronPpSensitivity.FixedValue = 1.6 // 1.5
            [Phenology].CAMP.EnvData.VrnTreatTemp = 5.8
            [Phenology].HeadEmergenceLongDayBase.FixedValue = 130 // default 140
        Cultivar Quench
          Command:
            [Phenology].CAMP.FLNparams.MinLN = 8 // 8.5 // 9
            [Phenology].CAMP.FLNparams.PpLN = 0 // 6
            [Phenology].CAMP.FLNparams.VrnLN = 2 // 0
            [Phenology].CAMP.FLNparams.VxPLN = 0
            [Phenology].Phyllochron.BasePhyllochron.FixedValue = 92.5 // 95 // 85
            [Phenology].PhyllochronPpSensitivity.FixedValue = 0.025 // 2
            [Phenology].CAMP.EnvData.VrnTreatTemp = 5.8
            [Phenology].HeadEmergenceLongDayBase.FixedValue = 40 // 140
            [Phenology].HeadEmergencePpSensitivity.FixedValue = 5
            [Phenology].GrainFilling.Target.FixedValue = 545
        Cultivar Retriever
          Command:
            [Phenology].CAMP.FLNparams.MinLN = 7.5 // 8.5 // 9
            [Phenology].CAMP.FLNparams.PpLN = 0 // 6
            [Phenology].CAMP.FLNparams.VrnLN = 1 // 2
            [Phenology].CAMP.FLNparams.VxPLN = -0.875 // 0
            [Phenology].Phyllochron.BasePhyllochron.FixedValue = 115 // 85
            [Phenology].PhyllochronPpSensitivity.FixedValue = 0 // 2
            [Phenology].CAMP.EnvData.VrnTreatTemp = 5.8
            [Phenology].HeadEmergenceLongDayBase.FixedValue = 30 // 140
            [Phenology].HeadEmergencePpSensitivity.FixedValue = 5.625
            [Phenology].GrainFilling.Target.FixedValue = 545
        Cultivar Pyramid
          Command:
            [Phenology].CAMP.FLNparams.MinLN = 7
            [Phenology].CAMP.FLNparams.PpLN = 7.5 // 8
            [Phenology].CAMP.FLNparams.VrnLN = 0
            [Phenology].CAMP.FLNparams.VxPLN = 0
            [Phenology].Phyllochron.BasePhyllochron.FixedValue = 85 // 80
            [Phenology].PhyllochronPpSensitivity.FixedValue = 2
            [Phenology].CAMP.EnvData.VrnTreatTemp = 5.8
            [Phenology].HeadEmergencePpSensitivity.FixedValue = 0.08 // default 0.33
        Cultivar Sherwood
          Command:
            [Phenology].CAMP.FLNparams.MinLN = 8
            [Phenology].CAMP.FLNparams.PpLN = 7 // 5
            [Phenology].CAMP.FLNparams.VrnLN = 0
            [Phenology].CAMP.FLNparams.VxPLN = 0
            [Phenology].Phyllochron.BasePhyllochron.FixedValue = 78
            [Phenology].PhyllochronPpSensitivity.FixedValue = 1.5
            [Phenology].CAMP.EnvData.VrnTreatTemp = 5.8
            [Phenology].HeadEmergenceLongDayBase.FixedValue = 120 // default 140
            [Phenology].HeadEmergencePpSensitivity.FixedValue = 0.83 // default 0.33
        Cultivar Tavern
          Command:
            [Phenology].CAMP.FLNparams.MinLN = 7.5 // 7
            [Phenology].CAMP.FLNparams.PpLN = 4 // 5
            [Phenology].CAMP.FLNparams.VrnLN = 0
            [Phenology].CAMP.FLNparams.VxPLN = 0
            [Phenology].Phyllochron.BasePhyllochron.FixedValue = 82.5 // 80
            [Phenology].PhyllochronPpSensitivity.FixedValue = 2.05 // 2
            [Phenology].CAMP.EnvData.VrnTreatTemp = 5.8
            [Phenology].HeadEmergenceLongDayBase.FixedValue = 125 // default 140
        Cultivar Triumph
          Command:
            [Phenology].CAMP.FLNparams.MinLN = 8 // 7 // 9 // 7
            [Phenology].CAMP.FLNparams.PpLN = 6
            [Phenology].CAMP.FLNparams.VrnLN = 0
            [Phenology].CAMP.FLNparams.VxPLN = 0 // 1 // 0
            [Phenology].Phyllochron.BasePhyllochron.FixedValue = 80 // 75 // 90 // 85 // 80 // 85
            [Phenology].PhyllochronPpSensitivity.FixedValue = 2
            [Phenology].CAMP.EnvData.VrnTreatTemp = 5.8
            [Phenology].HeadEmergenceLongDayBase.FixedValue = 155 // 150 // 250
            [Phenology].HeadEmergencePpSensitivity.FixedValue = 3
            [Phenology].GrainFilling.Target.FixedValue = 545
        Cultivar Vortex
          Command:
            [Phenology].CAMP.FLNparams.MinLN = 8
            [Phenology].CAMP.FLNparams.PpLN = 5.5 // 5
            [Phenology].CAMP.FLNparams.VrnLN = 0
            [Phenology].CAMP.FLNparams.VxPLN = 0
            [Phenology].Phyllochron.BasePhyllochron.FixedValue = 80 // 75
            [Phenology].PhyllochronPpSensitivity.FixedValue = 2
            [Phenology].CAMP.EnvData.VrnTreatTemp = 5.8
            [Phenology].HeadEmergenceLongDayBase.FixedValue = 120 // default 140
        Cultivar Baudin
          Command:
            [Phenology].CAMP.FLNparams.MinLN = 7
            [Phenology].CAMP.FLNparams.PpLN = 5.5 // 4
            [Phenology].CAMP.FLNparams.VrnLN = 0
            [Phenology].CAMP.FLNparams.VxPLN = 0.75 // 0.25 // 0
            [Phenology].Phyllochron.BasePhyllochron.FixedValue = 100 // 95
            [Phenology].PhyllochronPpSensitivity.FixedValue = 1.075 // 1.025 // 0.6
            [Phenology].CAMP.EnvData.VrnTreatTemp = 5.8
            [Phenology].HeadEmergenceLongDayBase.FixedValue = 90 // 120 // 140
            [Phenology].HeadEmergencePpSensitivity.FixedValue = 1.75 // 2.5 // 3
            [Phenology].GrainFilling.Target.FixedValue = 656.25 // 606.25 // 306.25 // 350
        Cultivar Capstan
          Command:
            // canot fix the flowering date from LatrobeCE
            [Phenology].CAMP.FLNparams.MinLN = 7.5 // 8
            [Phenology].CAMP.FLNparams.PpLN = 4.625 // 4.5 // 4
            [Phenology].CAMP.FLNparams.VrnLN = 0.5 // 0.125 // 0
            [Phenology].CAMP.FLNparams.VxPLN = -2
            [Phenology].Phyllochron.BasePhyllochron.FixedValue = 93
            [Phenology].PhyllochronPpSensitivity.FixedValue = 1.075 // 1.05 // 0.6
            [Phenology].CAMP.EnvData.VrnTreatTemp = 5.8
            [Phenology].HeadEmergenceLongDayBase.FixedValue = 50
            [Phenology].HeadEmergencePpSensitivity.FixedValue = 7.125 // 7.5 // 8
            [Phenology].GrainFilling.Target.FixedValue = 643.75 // 625 // 300 // 350
            //[Phenology].CAMP.FLNparams.MinLN = 8
            //[Phenology].CAMP.FLNparams.PpLN = 4
            //[Phenology].CAMP.FLNparams.VrnLN = 0
            //[Phenology].CAMP.FLNparams.VxPLN = -2
            //[Phenology].Phyllochron.BasePhyllochron.FixedValue = 87.44227888
            //[Phenology].PhyllochronPpSensitivity.FixedValue = 0.655991185
            //[Phenology].CAMP.EnvData.VrnTreatTemp = 5.8
            //[Phenology].HeadEmergenceLongDayBase.FixedValue = 50
            //[Phenology].HeadEmergencePpSensitivity.FixedValue = 5
        Cultivar Fleet
          Command:
            [Phenology].CAMP.FLNparams.MinLN = 8
            [Phenology].CAMP.FLNparams.PpLN = 3.125 // 3
            [Phenology].CAMP.FLNparams.VrnLN = 0.125 // 0
            [Phenology].CAMP.FLNparams.VxPLN = -2
            [Phenology].Phyllochron.BasePhyllochron.FixedValue = 88
            [Phenology].PhyllochronPpSensitivity.FixedValue = 0.575 // 0.6
            [Phenology].CAMP.EnvData.VrnTreatTemp = 5.8
            [Phenology].HeadEmergenceLongDayBase.FixedValue = 100 // 140
            [Phenology].HeadEmergencePpSensitivity.FixedValue = 2.125 // 2.375 // 2
            [Phenology].GrainFilling.Target.FixedValue = 668.75 // 587.5 // 250 // 400
            //[Phenology].CAMP.FLNparams.MinLN = 8
            //[Phenology].CAMP.FLNparams.PpLN = 3
            //[Phenology].CAMP.FLNparams.VrnLN = 0
            //[Phenology].CAMP.FLNparams.VxPLN = -2
            //[Phenology].Phyllochron.BasePhyllochron.FixedValue = 90.88228131
            //[Phenology].PhyllochronPpSensitivity.FixedValue = 0.4688122
            //[Phenology].CAMP.EnvData.VrnTreatTemp = 5.8
            //[Phenology].HeadEmergenceLongDayBase.FixedValue = 50
            //[Phenology].HeadEmergencePpSensitivity.FixedValue = 2
        Cultivar Hindmarsh
          Command:
            [Phenology].CAMP.FLNparams.MinLN = 9
            [Phenology].CAMP.FLNparams.PpLN = 4
            [Phenology].CAMP.FLNparams.VrnLN = 0
            [Phenology].CAMP.FLNparams.VxPLN = 0
            [Phenology].Phyllochron.BasePhyllochron.FixedValue = 87
            [Phenology].PhyllochronPpSensitivity.FixedValue = 1.025 // 0.8
            [Phenology].CAMP.EnvData.VrnTreatTemp = 5.8
            [Phenology].HeadEmergenceLongDayBase.FixedValue = 50
            [Phenology].HeadEmergencePpSensitivity.FixedValue = 1.25 // 0.75 // 0.5
            [Phenology].GrainFilling.Target.FixedValue = 725 // 400
            //[Phenology].CAMP.FLNparams.MinLN = 9
            //[Phenology].CAMP.FLNparams.PpLN = 4
            //[Phenology].CAMP.FLNparams.VrnLN = 0
            //[Phenology].CAMP.FLNparams.VxPLN = 0
            //[Phenology].Phyllochron.BasePhyllochron.FixedValue = 85
            //[Phenology].PhyllochronPpSensitivity.FixedValue = 1.1
            //[Phenology].CAMP.EnvData.VrnTreatTemp = 5.8
        Cultivar Commander
          Command:
            [Phenology].CAMP.FLNparams.MinLN = 8.5 // 8
            [Phenology].CAMP.FLNparams.PpLN = 3.5 // 3
            [Phenology].CAMP.FLNparams.VrnLN = 1
            [Phenology].CAMP.FLNparams.VxPLN = 0
            [Phenology].Phyllochron.BasePhyllochron.FixedValue = 80
            [Phenology].PhyllochronPpSensitivity.FixedValue = 0.8
            [Phenology].CAMP.EnvData.VrnTreatTemp = 5.8
            [Phenology].HeadEmergenceLongDayBase.FixedValue = 110
            [Phenology].HeadEmergencePpSensitivity.FixedValue = 1.625 // 2
            [Phenology].GrainFilling.Target.FixedValue = 656.25 // 343.75 // 400
            //[Phenology].CAMP.FLNparams.MinLN = 7.666666667
            //[Phenology].CAMP.FLNparams.PpLN = 2.333333333
            //[Phenology].CAMP.FLNparams.VrnLN = 4
            //[Phenology].CAMP.FLNparams.VxPLN = -5.666666667
            //[Phenology].Phyllochron.BasePhyllochron.FixedValue = 96.92081575
            //[Phenology].PhyllochronPpSensitivity.FixedValue = 0.369052131
            //[Phenology].CAMP.EnvData.VrnTreatTemp = 5.8
            //[Phenology].HeadEmergenceLongDayBase.FixedValue = 50
            //[Phenology].HeadEmergencePpSensitivity.FixedValue = 1
        Cultivar Fathom
          Command:
            [Phenology].CAMP.FLNparams.MinLN = 7
            [Phenology].CAMP.FLNparams.PpLN = 6.875 // 6
            [Phenology].CAMP.FLNparams.VrnLN = 9 // 8
            [Phenology].CAMP.FLNparams.VxPLN = -7
            [Phenology].Phyllochron.BasePhyllochron.FixedValue = 82.5 // 80
            [Phenology].PhyllochronPpSensitivity.FixedValue = 0.5 // 0.6
            [Phenology].CAMP.EnvData.VrnTreatTemp = 5.8
            [Phenology].HeadEmergenceLongDayBase.FixedValue = 50 // 80
            [Phenology].HeadEmergencePpSensitivity.FixedValue = 2.125 // 1.75 // 2
            //[Phenology].CAMP.FLNparams.MinLN = 6
            //[Phenology].CAMP.FLNparams.PpLN = 5
            //[Phenology].CAMP.FLNparams.VrnLN = 7
            //[Phenology].CAMP.FLNparams.VxPLN = -6
            //[Phenology].Phyllochron.BasePhyllochron.FixedValue = 82.17586355
            //[Phenology].PhyllochronPpSensitivity.FixedValue = 0.85248787
            //[Phenology].CAMP.EnvData.VrnTreatTemp = 5.8
            //[Phenology].HeadEmergenceLongDayBase.FixedValue = 50
            //[Phenology].HeadEmergencePpSensitivity.FixedValue = 1
        Cultivar Compass
          Command:
            [Phenology].CAMP.FLNparams.MinLN = 9
            [Phenology].CAMP.FLNparams.PpLN = 1.125 // 1
            [Phenology].CAMP.FLNparams.VrnLN = 1
            [Phenology].CAMP.FLNparams.VxPLN = 1.25 // 1
            [Phenology].Phyllochron.BasePhyllochron.FixedValue = 80
            [Phenology].PhyllochronPpSensitivity.FixedValue = 0.45 // 0.5
            [Phenology].CAMP.EnvData.VrnTreatTemp = 5.8
            [Phenology].HeadEmergenceLongDayBase.FixedValue = 95 // 100
            [Phenology].HeadEmergencePpSensitivity.FixedValue = 1.5 // 1
            //[Phenology].CAMP.FLNparams.MinLN = 9
            //[Phenology].CAMP.FLNparams.PpLN = -3
            //[Phenology].CAMP.FLNparams.VrnLN = 5
            //[Phenology].CAMP.FLNparams.VxPLN = -5
            //[Phenology].Phyllochron.BasePhyllochron.FixedValue = 104.3258054
            //[Phenology].PhyllochronPpSensitivity.FixedValue = 0.246502671
            //[Phenology].CAMP.EnvData.VrnTreatTemp = 5.8
            //[Phenology].HeadEmergenceLongDayBase.FixedValue = 50
            //[Phenology].HeadEmergencePpSensitivity.FixedValue = 0
        Cultivar Urambie
          Command:
            [Phenology].CAMP.FLNparams.MinLN = 10
            [Phenology].CAMP.FLNparams.PpLN = 0
            [Phenology].CAMP.FLNparams.VrnLN = 9.5 // 10
            [Phenology].CAMP.FLNparams.VxPLN = -4
            [Phenology].Phyllochron.BasePhyllochron.FixedValue = 88
            [Phenology].PhyllochronPpSensitivity.FixedValue = 0.65 // 0.45
            [Phenology].CAMP.EnvData.VrnTreatTemp = 5.8
            [Phenology].HeadEmergenceLongDayBase.FixedValue = 30 // 50
            [Phenology].HeadEmergencePpSensitivity.FixedValue = 2.125 // 2.25 // 2
            //[Phenology].CAMP.FLNparams.MinLN = 9.666666667
            //[Phenology].CAMP.FLNparams.PpLN = -1.666666667
            //[Phenology].CAMP.FLNparams.VrnLN = 14
            //[Phenology].CAMP.FLNparams.VxPLN = -4.666666667
            //[Phenology].Phyllochron.BasePhyllochron.FixedValue = 112.8025962
            //[Phenology].PhyllochronPpSensitivity.FixedValue = 0.103185899
            //[Phenology].CAMP.EnvData.VrnTreatTemp = 5.8
            //[Phenology].HeadEmergenceLongDayBase.FixedValue = 50
            //[Phenology].HeadEmergencePpSensitivity.FixedValue = 0
        Cultivar Buloke
          Command:
            [Phenology].CAMP.FLNparams.MinLN = 9
            [Phenology].CAMP.FLNparams.PpLN = 1.375 // 1
            [Phenology].CAMP.FLNparams.VrnLN = 0.5 // 0
            [Phenology].CAMP.FLNparams.VxPLN = -0.5 // 0
            [Phenology].Phyllochron.BasePhyllochron.FixedValue = 90
            [Phenology].PhyllochronPpSensitivity.FixedValue = 1.175 // 1.1 // 1.0
            [Phenology].CAMP.EnvData.VrnTreatTemp = 5.8
            [Phenology].HeadEmergenceLongDayBase.FixedValue = 70 // 50
            [Phenology].HeadEmergencePpSensitivity.FixedValue = 0.625 // 1
            [Phenology].GrainFilling.Target.FixedValue = 712.5 // 737.5 // 425 // 500
            //[Phenology].CAMP.FLNparams.MinLN = 9
            //[Phenology].CAMP.FLNparams.PpLN = 4
            //[Phenology].CAMP.FLNparams.VrnLN = 0
            //[Phenology].CAMP.FLNparams.VxPLN = 0
            //[Phenology].Phyllochron.BasePhyllochron.FixedValue = 85
            //[Phenology].PhyllochronPpSensitivity.FixedValue = 1.1
            //[Phenology].CAMP.EnvData.VrnTreatTemp = 5.8
        Cultivar Keel
          Command:
            [Phenology].CAMP.FLNparams.MinLN = 7.875 // 8
            [Phenology].CAMP.FLNparams.PpLN = 1.875 // 2
            [Phenology].CAMP.FLNparams.VrnLN = 0
            [Phenology].CAMP.FLNparams.VxPLN = 0
            [Phenology].Phyllochron.BasePhyllochron.FixedValue = 91.25 // 85
            [Phenology].PhyllochronPpSensitivity.FixedValue = 1.725 // 1.775 // 1.8
            [Phenology].CAMP.EnvData.VrnTreatTemp = 5.8
            [Phenology].HeadEmergenceLongDayBase.FixedValue = 35 // 55 // 50
            [Phenology].HeadEmergencePpSensitivity.FixedValue = 0.125 // 0
            [Phenology].GrainFilling.Target.FixedValue = 737.5 // 400
            //[Phenology].CAMP.FLNparams.MinLN = 6
            //[Phenology].CAMP.FLNparams.PpLN = 4
            //[Phenology].CAMP.FLNparams.VrnLN = 1
            //[Phenology].CAMP.FLNparams.VxPLN = -1
            //[Phenology].Phyllochron.BasePhyllochron.FixedValue = 58.40056656
            //[Phenology].PhyllochronPpSensitivity.FixedValue = 1.251746574
            //[Phenology].CAMP.EnvData.VrnTreatTemp = 5.8
            //[Phenology].HeadEmergenceLongDayBase.FixedValue = 70
            //[Phenology].HeadEmergencePpSensitivity.FixedValue = 7
        Cultivar Oxford
          Command:
            [Phenology].CAMP.FLNparams.MinLN = 8
            [Phenology].CAMP.FLNparams.PpLN = 3.625 // 3
            [Phenology].CAMP.FLNparams.VrnLN = 0.75 // 0.25 // 0
            [Phenology].CAMP.FLNparams.VxPLN = -4
            [Phenology].Phyllochron.BasePhyllochron.FixedValue = 100
            [Phenology].PhyllochronPpSensitivity.FixedValue = 0.55 // 0.5
            [Phenology].CAMP.EnvData.VrnTreatTemp = 5.8
            [Phenology].HeadEmergenceLongDayBase.FixedValue = 95 // 110 // 100
            [Phenology].HeadEmergencePpSensitivity.FixedValue = 1.625 // 1
            [Phenology].GrainFilling.Target.FixedValue = 700 // 725 // 400
            //[Phenology].CAMP.FLNparams.MinLN = 9.666666667
            //[Phenology].CAMP.FLNparams.PpLN = -3.666666667
            //[Phenology].CAMP.FLNparams.VrnLN = 3
            //[Phenology].CAMP.FLNparams.VxPLN = -6.666666667
            //[Phenology].Phyllochron.BasePhyllochron.FixedValue = 139.8064143
            //[Phenology].PhyllochronPpSensitivity.FixedValue = 0.107968397
            //[Phenology].CAMP.EnvData.VrnTreatTemp = 5.8
            //[Phenology].HeadEmergenceLongDayBase.FixedValue = 50
            //[Phenology].HeadEmergencePpSensitivity.FixedValue = 1
        Cultivar Dash
          Command:
            [Phenology].CAMP.FLNparams.MinLN = 8
            [Phenology].CAMP.FLNparams.PpLN = 5
            [Phenology].CAMP.FLNparams.VrnLN = 0.5 // 0
            [Phenology].CAMP.FLNparams.VxPLN = 0.25 // 0
            [Phenology].Phyllochron.BasePhyllochron.FixedValue = 80 // 90 // 85
            [Phenology].PhyllochronPpSensitivity.FixedValue = 1.675 // 1.6 // 1.5 // 1.5 // 2
            [Phenology].CAMP.EnvData.VrnTreatTemp = 5.8
            [Phenology].HeadEmergenceLongDayBase.FixedValue = 85 // 50
            [Phenology].HeadEmergencePpSensitivity.FixedValue = 1.25 // 1
            //[Phenology].CAMP.FLNparams.MinLN = 9
            //[Phenology].CAMP.FLNparams.PpLN = 6
            //[Phenology].CAMP.FLNparams.VrnLN = 0
            //[Phenology].CAMP.FLNparams.VxPLN = 0
            //[Phenology].Phyllochron.BasePhyllochron.FixedValue = 85
            //[Phenology].PhyllochronPpSensitivity.FixedValue = 2
            //[Phenology].CAMP.EnvData.VrnTreatTemp = 5.8
        Cultivar Omaka
          Command:
            [Phenology].CAMP.FLNparams.MinLN = 7 // 8
            [Phenology].CAMP.FLNparams.PpLN = 4.5 // 5
            [Phenology].CAMP.FLNparams.VrnLN = 0.25 // 0
            [Phenology].CAMP.FLNparams.VxPLN = 0
            [Phenology].Phyllochron.BasePhyllochron.FixedValue = 95 // 85
            [Phenology].PhyllochronPpSensitivity.FixedValue = 1.9 // 2 // 2.2
            [Phenology].CAMP.EnvData.VrnTreatTemp = 5.8
            [Phenology].HeadEmergenceLongDayBase.FixedValue = 110 // 80 // 50
            [Phenology].HeadEmergencePpSensitivity.FixedValue = 1
            //[Phenology].CAMP.FLNparams.MinLN = 9
            //[Phenology].CAMP.FLNparams.PpLN = 6
            //[Phenology].CAMP.FLNparams.VrnLN = 0
            //[Phenology].CAMP.FLNparams.VxPLN = 0
            //[Phenology].Phyllochron.BasePhyllochron.FixedValue = 80
            //[Phenology].PhyllochronPpSensitivity.FixedValue = 2
            //[Phenology].CAMP.EnvData.VrnTreatTemp = 5.8
            // [Leaf].ExtinctionCoeff.VegetativePhase.FixedValue=0.6
        Cultivar County
          Command:
            [Phenology].CAMP.FLNparams.MinLN = 8
            [Phenology].CAMP.FLNparams.PpLN = 3.5 // 2
            [Phenology].CAMP.FLNparams.VrnLN = 0
            [Phenology].CAMP.FLNparams.VxPLN = 0
            [Phenology].Phyllochron.BasePhyllochron.FixedValue = 85 // 90
            [Phenology].PhyllochronPpSensitivity.FixedValue = 1.3 // 1
            [Phenology].CAMP.EnvData.VrnTreatTemp = 5.8
            //[Phenology].HeadEmergenceLongDayBase.FixedValue = 90
            //[Phenology].HeadEmergencePpSensitivity.FixedValue = 1
            //[Phenology].CAMP.FLNparams.MinLN = 9
            //[Phenology].CAMP.FLNparams.PpLN = 6
            //[Phenology].CAMP.FLNparams.VrnLN = 0
            //[Phenology].CAMP.FLNparams.VxPLN = 0
            //[Phenology].Phyllochron.BasePhyllochron.FixedValue = 90
            //[Phenology].PhyllochronPpSensitivity.FixedValue = 1
            //[Phenology].CAMP.EnvData.VrnTreatTemp = 5.8
            [Phenology].HeadEmergenceLongDayBase.FixedValue = 120 // default 140
        Cultivar Cellar
          Command:
            [Phenology].CAMP.FLNparams.MinLN = 7
            [Phenology].CAMP.FLNparams.PpLN = 5.625 // 5
            [Phenology].CAMP.FLNparams.VrnLN = 0
            [Phenology].CAMP.FLNparams.VxPLN = 0
            [Phenology].Phyllochron.BasePhyllochron.FixedValue = 90
            [Phenology].PhyllochronPpSensitivity.FixedValue = 1.2
            [Phenology].CAMP.EnvData.VrnTreatTemp = 5.8
        Cultivar Alestar
          Command:
            [Phenology].CAMP.FLNparams.MinLN = 9
            [Phenology].CAMP.FLNparams.PpLN = 0 // 1
            [Phenology].CAMP.FLNparams.VrnLN = 0
            [Phenology].CAMP.FLNparams.VxPLN = 0
            [Phenology].Phyllochron.BasePhyllochron.FixedValue = 95 // 90
            [Phenology].PhyllochronPpSensitivity.FixedValue = 0.05 // 0.5
            [Phenology].CAMP.EnvData.VrnTreatTemp = 5.8
            [Phenology].HeadEmergenceLongDayBase.FixedValue = 95 // 150
            [Phenology].HeadEmergencePpSensitivity.FixedValue = 3.5
            //[Phenology].CAMP.FLNparams.MinLN = 9
            //[Phenology].CAMP.FLNparams.PpLN = -3
            //[Phenology].CAMP.FLNparams.VrnLN = 6
            //[Phenology].CAMP.FLNparams.VxPLN = -7
            //[Phenology].Phyllochron.BasePhyllochron.FixedValue = 120.9431217
            //[Phenology].PhyllochronPpSensitivity.FixedValue = 0.207440505
            //[Phenology].CAMP.EnvData.VrnTreatTemp = 5.8
            //[Phenology].HeadEmergenceLongDayBase.FixedValue = 50
            //[Phenology].HeadEmergencePpSensitivity.FixedValue = 0
        Cultivar Banks
          Command:
            [Phenology].CAMP.FLNparams.MinLN = 7
            [Phenology].CAMP.FLNparams.PpLN = 1 // 2
            [Phenology].CAMP.FLNparams.VrnLN = 0.75 // 1
            [Phenology].CAMP.FLNparams.VxPLN = 1
            [Phenology].Phyllochron.BasePhyllochron.FixedValue = 91.75 // 88
            [Phenology].PhyllochronPpSensitivity.FixedValue = 0 // 0.45
            [Phenology].CAMP.EnvData.VrnTreatTemp = 5.8
            [Phenology].HeadEmergenceLongDayBase.FixedValue = 260 // 240
            [Phenology].HeadEmergencePpSensitivity.FixedValue = 1.5 // 2
            //[Phenology].CAMP.FLNparams.MinLN = 8
            //[Phenology].CAMP.FLNparams.PpLN = -2
            //[Phenology].CAMP.FLNparams.VrnLN = 4
            //[Phenology].CAMP.FLNparams.VxPLN = -6
            //[Phenology].Phyllochron.BasePhyllochron.FixedValue = 120.3588019
            //[Phenology].PhyllochronPpSensitivity.FixedValue = 0.23234103
            //[Phenology].CAMP.EnvData.VrnTreatTemp = 5.8
            //[Phenology].HeadEmergenceLongDayBase.FixedValue = 70
            //[Phenology].HeadEmergencePpSensitivity.FixedValue = 2
        Cultivar Bass
          Command:
            [Phenology].CAMP.FLNparams.MinLN = 8
            [Phenology].CAMP.FLNparams.PpLN = 0.25 // 1
            [Phenology].CAMP.FLNparams.VrnLN = 1
            [Phenology].CAMP.FLNparams.VxPLN = 0.25 // 0
            [Phenology].Phyllochron.BasePhyllochron.FixedValue = 92.5 // 80
            [Phenology].PhyllochronPpSensitivity.FixedValue = 0 // 0.6
            [Phenology].CAMP.EnvData.VrnTreatTemp = 5.8
            [Phenology].HeadEmergenceLongDayBase.FixedValue = 170 // 160
            [Phenology].HeadEmergencePpSensitivity.FixedValue = 2
            //[Phenology].CAMP.FLNparams.MinLN = 8.333333333
            //[Phenology].CAMP.FLNparams.PpLN = -2.333333333
            //[Phenology].CAMP.FLNparams.VrnLN = 4
            //[Phenology].CAMP.FLNparams.VxPLN = -3.333333333
            //[Phenology].Phyllochron.BasePhyllochron.FixedValue = 110.9847693
            //[Phenology].PhyllochronPpSensitivity.FixedValue = 0.261968924
            //[Phenology].CAMP.EnvData.VrnTreatTemp = 5.8
            //[Phenology].HeadEmergenceLongDayBase.FixedValue = 50
            //[Phenology].HeadEmergencePpSensitivity.FixedValue = 2
        Cultivar Biere
          Command:
            [Phenology].CAMP.FLNparams.MinLN = 8
            [Phenology].CAMP.FLNparams.PpLN = 0 // 1
            [Phenology].CAMP.FLNparams.VrnLN = 2
            [Phenology].CAMP.FLNparams.VxPLN = 0
            [Phenology].Phyllochron.BasePhyllochron.FixedValue = 87.5 // 75
            [Phenology].PhyllochronPpSensitivity.FixedValue = 0.025 // 0.6
            [Phenology].CAMP.EnvData.VrnTreatTemp = 5.8
            [Phenology].HeadEmergenceLongDayBase.FixedValue = 60 // 140 // 220
            [Phenology].HeadEmergencePpSensitivity.FixedValue = 5
            //[Phenology].CAMP.FLNparams.MinLN = 8.333333333
            //[Phenology].CAMP.FLNparams.PpLN = -2.333333333
            //[Phenology].CAMP.FLNparams.VrnLN = 0
            //[Phenology].CAMP.FLNparams.VxPLN = -2.333333333
            //[Phenology].Phyllochron.BasePhyllochron.FixedValue = 118.6729904
            //[Phenology].PhyllochronPpSensitivity.FixedValue = 0.182591106
            //[Phenology].CAMP.EnvData.VrnTreatTemp = 5.8
            //[Phenology].HeadEmergenceLongDayBase.FixedValue = 50
            //[Phenology].HeadEmergencePpSensitivity.FixedValue = 4
        Cultivar Csirob1
          Command:
            [Phenology].CAMP.FLNparams.MinLN = 7
            [Phenology].CAMP.FLNparams.PpLN = 2.125 // 0
            [Phenology].CAMP.FLNparams.VrnLN = 5
            [Phenology].CAMP.FLNparams.VxPLN = -3
            [Phenology].Phyllochron.BasePhyllochron.FixedValue = 70
            [Phenology].PhyllochronPpSensitivity.FixedValue = 0.525 // 0.6
            [Phenology].CAMP.EnvData.VrnTreatTemp = 5.8
            [Phenology].HeadEmergenceLongDayBase.FixedValue = 130 // 40 // 300
            [Phenology].HeadEmergencePpSensitivity.FixedValue = 4.375 // 4
            //[Phenology].CAMP.FLNparams.MinLN = 7.333333333
            //[Phenology].CAMP.FLNparams.PpLN = 0.666666667
            //[Phenology].CAMP.FLNparams.VrnLN = 5
            //[Phenology].CAMP.FLNparams.VxPLN = -3.333333333
            //[Phenology].Phyllochron.BasePhyllochron.FixedValue = 76.78280555
            //[Phenology].PhyllochronPpSensitivity.FixedValue = 0.619292867
            //[Phenology].CAMP.EnvData.VrnTreatTemp = 5.8
            //[Phenology].HeadEmergenceLongDayBase.FixedValue = 90
            //[Phenology].HeadEmergencePpSensitivity.FixedValue = 6
        Cultivar Csirob3
          Command:
            [Phenology].CAMP.FLNparams.MinLN = 5.75 // 7
            [Phenology].CAMP.FLNparams.PpLN = 0.75 // 0
            [Phenology].CAMP.FLNparams.VrnLN = 2.75 // 3
            [Phenology].CAMP.FLNparams.VxPLN = -3
            [Phenology].Phyllochron.BasePhyllochron.FixedValue = 78.75 // 70
            [Phenology].PhyllochronPpSensitivity.FixedValue = 0.8 // 0.65
            [Phenology].CAMP.EnvData.VrnTreatTemp = 5.8
            [Phenology].HeadEmergenceLongDayBase.FixedValue = 55 // 85 // 300
            [Phenology].HeadEmergencePpSensitivity.FixedValue = 3.75 // 4
            //[Phenology].CAMP.FLNparams.MinLN = 6
            //[Phenology].CAMP.FLNparams.PpLN = 4
            //[Phenology].CAMP.FLNparams.VrnLN = 0
            //[Phenology].CAMP.FLNparams.VxPLN = 0
            //[Phenology].Phyllochron.BasePhyllochron.FixedValue = 57.45009872
            //[Phenology].PhyllochronPpSensitivity.FixedValue = 1.18910351
            //[Phenology].CAMP.EnvData.VrnTreatTemp = 5.8
            //[Phenology].HeadEmergenceLongDayBase.FixedValue = 200
            //[Phenology].HeadEmergencePpSensitivity.FixedValue = 4
        Cultivar Flinders
          Command:
            [Phenology].CAMP.FLNparams.MinLN = 6
            [Phenology].CAMP.FLNparams.PpLN = 1.875 // 3
            [Phenology].CAMP.FLNparams.VrnLN = 0
            [Phenology].CAMP.FLNparams.VxPLN = 3
            [Phenology].Phyllochron.BasePhyllochron.FixedValue = 88.75 // 100
            [Phenology].PhyllochronPpSensitivity.FixedValue = 0 // 0.4
            [Phenology].CAMP.EnvData.VrnTreatTemp = 5.8
            [Phenology].HeadEmergenceLongDayBase.FixedValue = 280 // 250
            [Phenology].HeadEmergencePpSensitivity.FixedValue = 2 // 3
            //[Phenology].CAMP.FLNparams.MinLN = 8.333333333
            //[Phenology].CAMP.FLNparams.PpLN = -2.333333333
            //[Phenology].CAMP.FLNparams.VrnLN = 5
            //[Phenology].CAMP.FLNparams.VxPLN = -7.333333333
            //[Phenology].Phyllochron.BasePhyllochron.FixedValue = 129.3942158
            //[Phenology].PhyllochronPpSensitivity.FixedValue = 0.105323488
            //[Phenology].CAMP.EnvData.VrnTreatTemp = 5.8
            //[Phenology].HeadEmergenceLongDayBase.FixedValue = 70
            //[Phenology].HeadEmergencePpSensitivity.FixedValue = 1
        Cultivar Franklin
          Command:
            [Phenology].CAMP.FLNparams.MinLN = 9
            [Phenology].CAMP.FLNparams.PpLN = 0.125 // 1
            [Phenology].CAMP.FLNparams.VrnLN = 1
            [Phenology].CAMP.FLNparams.VxPLN = 0
            [Phenology].Phyllochron.BasePhyllochron.FixedValue = 95 // 80
            [Phenology].PhyllochronPpSensitivity.FixedValue = 0 // 0.5
            [Phenology].CAMP.EnvData.VrnTreatTemp = 5.8
            [Phenology].HeadEmergenceLongDayBase.FixedValue = 85 // 190 // 250
            [Phenology].HeadEmergencePpSensitivity.FixedValue = 5.125 // 5
            //[Phenology].CAMP.FLNparams.MinLN = 10
            //[Phenology].CAMP.FLNparams.PpLN = -2
            //[Phenology].CAMP.FLNparams.VrnLN = 5
            //[Phenology].CAMP.FLNparams.VxPLN = -7
            //[Phenology].Phyllochron.BasePhyllochron.FixedValue = 103.9731331
            //[Phenology].PhyllochronPpSensitivity.FixedValue = 0.195075087
            //[Phenology].CAMP.EnvData.VrnTreatTemp = 5.8
            //[Phenology].HeadEmergenceLongDayBase.FixedValue = 50
            //[Phenology].HeadEmergencePpSensitivity.FixedValue = 7
        Cultivar Gairdner
          Command:
            [Phenology].CAMP.FLNparams.MinLN = 9
            [Phenology].CAMP.FLNparams.PpLN = 1.25 // 2
            [Phenology].CAMP.FLNparams.VrnLN = 1
            [Phenology].CAMP.FLNparams.VxPLN = 0.25 // 0
            [Phenology].Phyllochron.BasePhyllochron.FixedValue = 81.25 // 80
            [Phenology].PhyllochronPpSensitivity.FixedValue = 0 // 0.4
            [Phenology].CAMP.EnvData.VrnTreatTemp = 5.8
            [Phenology].HeadEmergenceLongDayBase.FixedValue = 90 // 160 // 200
            [Phenology].HeadEmergencePpSensitivity.FixedValue = 4.25 // 4
            //[Phenology].CAMP.FLNparams.MinLN = 10
            //[Phenology].CAMP.FLNparams.PpLN = 0
            //[Phenology].CAMP.FLNparams.VrnLN = 4
            //[Phenology].CAMP.FLNparams.VxPLN = -5
            //[Phenology].Phyllochron.BasePhyllochron.FixedValue = 88.54255431
            //[Phenology].PhyllochronPpSensitivity.FixedValue = 0.325049926
            //[Phenology].CAMP.EnvData.VrnTreatTemp = 5.8
            //[Phenology].HeadEmergenceLongDayBase.FixedValue = 50
            //[Phenology].HeadEmergencePpSensitivity.FixedValue = 2
        Cultivar Granger
          Command:
            [Phenology].CAMP.FLNparams.MinLN = 9
            [Phenology].CAMP.FLNparams.PpLN = 0.25 // 2
            [Phenology].CAMP.FLNparams.VrnLN = 1.25 // 0
            [Phenology].CAMP.FLNparams.VxPLN = -3
            [Phenology].Phyllochron.BasePhyllochron.FixedValue = 85 // 80
            [Phenology].PhyllochronPpSensitivity.FixedValue = 0 // 0.5
            [Phenology].CAMP.EnvData.VrnTreatTemp = 5.8
            [Phenology].HeadEmergenceLongDayBase.FixedValue = 100 // 140 // 200
            [Phenology].HeadEmergencePpSensitivity.FixedValue = 3.625 // 3
            //[Phenology].CAMP.FLNparams.MinLN = 9
            //[Phenology].CAMP.FLNparams.PpLN = 2
            //[Phenology].CAMP.FLNparams.VrnLN = 0
            //[Phenology].CAMP.FLNparams.VxPLN = -3
            //[Phenology].Phyllochron.BasePhyllochron.FixedValue = 108.6702997
            //[Phenology].PhyllochronPpSensitivity.FixedValue = 0.190962591
            //[Phenology].CAMP.EnvData.VrnTreatTemp = 5.8
            //[Phenology].HeadEmergenceLongDayBase.FixedValue = 50
            //[Phenology].HeadEmergencePpSensitivity.FixedValue = 0
        Cultivar Grout
          Command:
            [Phenology].CAMP.FLNparams.MinLN = 7
            [Phenology].CAMP.FLNparams.PpLN = 1.25 // 2
            [Phenology].CAMP.FLNparams.VrnLN = 0
            [Phenology].CAMP.FLNparams.VxPLN = 0.25 // 0
            [Phenology].Phyllochron.BasePhyllochron.FixedValue = 91.25 // 85
            [Phenology].PhyllochronPpSensitivity.FixedValue = 0.8 // 0.4
            [Phenology].CAMP.EnvData.VrnTreatTemp = 5.8
            [Phenology].HeadEmergenceLongDayBase.FixedValue = 95 // 80 // 200
            [Phenology].HeadEmergencePpSensitivity.FixedValue = 4
            //[Phenology].CAMP.FLNparams.MinLN = 7.333333333
            //[Phenology].CAMP.FLNparams.PpLN = 2.666666667
            //[Phenology].CAMP.FLNparams.VrnLN = 0
            //[Phenology].CAMP.FLNparams.VxPLN = -1.333333333
            //[Phenology].Phyllochron.BasePhyllochron.FixedValue = 86.48989044
            //[Phenology].PhyllochronPpSensitivity.FixedValue = 0.62631665
            //[Phenology].CAMP.EnvData.VrnTreatTemp = 5.8
            //[Phenology].HeadEmergenceLongDayBase.FixedValue = 50
            //[Phenology].HeadEmergencePpSensitivity.FixedValue = 3
        Cultivar Lockyer
          Command:
            [Phenology].CAMP.FLNparams.MinLN = 6
            [Phenology].CAMP.FLNparams.PpLN = 3
            [Phenology].CAMP.FLNparams.VrnLN = 1
            [Phenology].CAMP.FLNparams.VxPLN = 0
            [Phenology].Phyllochron.BasePhyllochron.FixedValue = 96.25 // 90
            [Phenology].PhyllochronPpSensitivity.FixedValue = 0.45
            [Phenology].CAMP.EnvData.VrnTreatTemp = 5.8
            [Phenology].HeadEmergenceLongDayBase.FixedValue = 145 // 170
            [Phenology].HeadEmergencePpSensitivity.FixedValue = 4.25 // 2
            //[Phenology].CAMP.FLNparams.MinLN = 6.666666667
            //[Phenology].CAMP.FLNparams.PpLN = 3.333333333
            //[Phenology].CAMP.FLNparams.VrnLN = 10
            //[Phenology].CAMP.FLNparams.VxPLN = -10.666666667
            //[Phenology].Phyllochron.BasePhyllochron.FixedValue = 97.89121109
            //[Phenology].PhyllochronPpSensitivity.FixedValue = 0.405093218
            //[Phenology].CAMP.EnvData.VrnTreatTemp = 5.8
            //[Phenology].HeadEmergenceLongDayBase.FixedValue = 70
            //[Phenology].HeadEmergencePpSensitivity.FixedValue = 1
        Cultivar Mundah
          Command:
            [Phenology].CAMP.FLNparams.MinLN = 8.75 // 9
            [Phenology].CAMP.FLNparams.PpLN = 1
            [Phenology].CAMP.FLNparams.VrnLN = 0
            [Phenology].CAMP.FLNparams.VxPLN = 0
            [Phenology].Phyllochron.BasePhyllochron.FixedValue = 82.5 // 80
            [Phenology].PhyllochronPpSensitivity.FixedValue = 0.6
            [Phenology].CAMP.EnvData.VrnTreatTemp = 5.8
            [Phenology].HeadEmergenceLongDayBase.FixedValue = 200 // 220
            [Phenology].HeadEmergencePpSensitivity.FixedValue = 3.2
            //[Phenology].CAMP.FLNparams.MinLN = 9
            //[Phenology].CAMP.FLNparams.PpLN = 1
            //[Phenology].CAMP.FLNparams.VrnLN = 0
            //[Phenology].CAMP.FLNparams.VxPLN = -1
            //[Phenology].Phyllochron.BasePhyllochron.FixedValue = 99.85179413
            //[Phenology].PhyllochronPpSensitivity.FixedValue = 0.253014157
            //[Phenology].CAMP.EnvData.VrnTreatTemp = 5.8
            //[Phenology].HeadEmergenceLongDayBase.FixedValue = 110
            //[Phenology].HeadEmergencePpSensitivity.FixedValue = 7
        Cultivar Navigator
          Command:
            [Phenology].CAMP.FLNparams.MinLN = 7
            [Phenology].CAMP.FLNparams.PpLN = 3.5 // 3
            [Phenology].CAMP.FLNparams.VrnLN = 5
            [Phenology].CAMP.FLNparams.VxPLN = -4.75 // -5
            [Phenology].Phyllochron.BasePhyllochron.FixedValue = 96.25 // 90
            [Phenology].PhyllochronPpSensitivity.FixedValue = 0.225 // 0.6
            [Phenology].CAMP.EnvData.VrnTreatTemp = 5.8
            [Phenology].HeadEmergenceLongDayBase.FixedValue = 125 // 130 // 250
            [Phenology].HeadEmergencePpSensitivity.FixedValue = 3.5 // 4
            //[Phenology].CAMP.FLNparams.MinLN = 8
            //[Phenology].CAMP.FLNparams.PpLN = 4
            //[Phenology].CAMP.FLNparams.VrnLN = 5
            //[Phenology].CAMP.FLNparams.VxPLN = -7
            //[Phenology].Phyllochron.BasePhyllochron.FixedValue = 93.43659898
            //[Phenology].PhyllochronPpSensitivity.FixedValue = 0.400967405
            //[Phenology].CAMP.EnvData.VrnTreatTemp = 5.8
            //[Phenology].HeadEmergenceLongDayBase.FixedValue = 50
            //[Phenology].HeadEmergencePpSensitivity.FixedValue = 1
        Cultivar Planet
          Command:
            [Phenology].CAMP.FLNparams.MinLN = 9.5 // 8
            [Phenology].CAMP.FLNparams.PpLN = 1
            [Phenology].CAMP.FLNparams.VrnLN = 0.875 // 0
            [Phenology].CAMP.FLNparams.VxPLN = -1
            [Phenology].Phyllochron.BasePhyllochron.FixedValue = 88
            [Phenology].PhyllochronPpSensitivity.FixedValue = 0.475 // 0.45
            [Phenology].CAMP.EnvData.VrnTreatTemp = 5.8
            [Phenology].HeadEmergenceLongDayBase.FixedValue = 60 // 200
            [Phenology].HeadEmergencePpSensitivity.FixedValue = 3.5
            //[Phenology].CAMP.FLNparams.MinLN = 9
            //[Phenology].CAMP.FLNparams.PpLN = 1
            //[Phenology].CAMP.FLNparams.VrnLN = 0
            //[Phenology].CAMP.FLNparams.VxPLN = -1
            //[Phenology].Phyllochron.BasePhyllochron.FixedValue = 117.2869488
            //[Phenology].PhyllochronPpSensitivity.FixedValue = 0.244404645
            //[Phenology].CAMP.EnvData.VrnTreatTemp = 5.8
            //[Phenology].HeadEmergenceLongDayBase.FixedValue = 70
            //[Phenology].HeadEmergencePpSensitivity.FixedValue = 6
        Cultivar Rosalind
          Command:
            [Phenology].CAMP.FLNparams.MinLN = 8
            [Phenology].CAMP.FLNparams.PpLN = 1.5 // 3
            [Phenology].CAMP.FLNparams.VrnLN = 0.25 // 0
            [Phenology].CAMP.FLNparams.VxPLN = 0
            [Phenology].Phyllochron.BasePhyllochron.FixedValue = 95 // 90
            [Phenology].PhyllochronPpSensitivity.FixedValue = 0 // 0.5
            [Phenology].CAMP.EnvData.VrnTreatTemp = 5.8
            [Phenology].HeadEmergenceLongDayBase.FixedValue = 80 // 120 // 240
            [Phenology].HeadEmergencePpSensitivity.FixedValue = 3.125 // 4
            //[Phenology].CAMP.FLNparams.MinLN = 9
            //[Phenology].CAMP.FLNparams.PpLN = -3
            //[Phenology].CAMP.FLNparams.VrnLN = 6
            //[Phenology].CAMP.FLNparams.VxPLN = -9
            //[Phenology].Phyllochron.BasePhyllochron.FixedValue = 113.0837881
            //[Phenology].PhyllochronPpSensitivity.FixedValue = 0.350857209
            //[Phenology].CAMP.EnvData.VrnTreatTemp = 5.8
            //[Phenology].HeadEmergenceLongDayBase.FixedValue = 50
            //[Phenology].HeadEmergencePpSensitivity.FixedValue = 0
        Cultivar Schooner
          Command:
            [Phenology].CAMP.FLNparams.MinLN = 6
            [Phenology].CAMP.FLNparams.PpLN = 3.5 // 3
            [Phenology].CAMP.FLNparams.VrnLN = 0
            [Phenology].CAMP.FLNparams.VxPLN = -2
            [Phenology].Phyllochron.BasePhyllochron.FixedValue = 72.5 // 70
            [Phenology].PhyllochronPpSensitivity.FixedValue = 0.65 // 0.8
            [Phenology].CAMP.EnvData.VrnTreatTemp = 5.8
            [Phenology].HeadEmergenceLongDayBase.FixedValue = 180 // 220
            [Phenology].HeadEmergencePpSensitivity.FixedValue = 3.875 // 5
            //[Phenology].CAMP.FLNparams.MinLN = 8
            //[Phenology].CAMP.FLNparams.PpLN = 1
            //[Phenology].CAMP.FLNparams.VrnLN = 0
            //[Phenology].CAMP.FLNparams.VxPLN = -2
            //[Phenology].Phyllochron.BasePhyllochron.FixedValue = 90.27490591
            //[Phenology].PhyllochronPpSensitivity.FixedValue = 0.517492533
            //[Phenology].CAMP.EnvData.VrnTreatTemp = 5.8
            //[Phenology].HeadEmergenceLongDayBase.FixedValue = 50
            //[Phenology].HeadEmergencePpSensitivity.FixedValue = 7
        Cultivar Scope
          Command:
            [Phenology].CAMP.FLNparams.MinLN = 8
            [Phenology].CAMP.FLNparams.PpLN = 1.75 // 2
            [Phenology].CAMP.FLNparams.VrnLN = 0.25 // 0
            [Phenology].CAMP.FLNparams.VxPLN = 1.375 // 1
            [Phenology].Phyllochron.BasePhyllochron.FixedValue = 85
            [Phenology].PhyllochronPpSensitivity.FixedValue = 0.03 // 0.38
            [Phenology].CAMP.EnvData.VrnTreatTemp = 5.8
            [Phenology].HeadEmergenceLongDayBase.FixedValue = 110 // 200
            [Phenology].HeadEmergencePpSensitivity.FixedValue = 3.875 // 4
            //[Phenology].CAMP.FLNparams.MinLN = 8
            //[Phenology].CAMP.FLNparams.PpLN = 2
            //[Phenology].CAMP.FLNparams.VrnLN = 0
            //[Phenology].CAMP.FLNparams.VxPLN = 1
            //[Phenology].Phyllochron.BasePhyllochron.FixedValue = 93.40444263
            //[Phenology].PhyllochronPpSensitivity.FixedValue = 0.379146059
            //[Phenology].CAMP.EnvData.VrnTreatTemp = 5.8
            //[Phenology].HeadEmergenceLongDayBase.FixedValue = 50
            //[Phenology].HeadEmergencePpSensitivity.FixedValue = 5
        Cultivar Shepherd
          Command:
            [Phenology].CAMP.FLNparams.MinLN = 7.875 // 8
            [Phenology].CAMP.FLNparams.PpLN = 1.75 // 2
            [Phenology].CAMP.FLNparams.VrnLN = 0
            [Phenology].CAMP.FLNparams.VxPLN = 1
            [Phenology].Phyllochron.BasePhyllochron.FixedValue = 100
            [Phenology].PhyllochronPpSensitivity.FixedValue = 0 // 0.1
            [Phenology].CAMP.EnvData.VrnTreatTemp = 5.8
            [Phenology].HeadEmergenceLongDayBase.FixedValue = 70 // 170 // 240
            [Phenology].HeadEmergencePpSensitivity.FixedValue = 4.5 // 4
            //[Phenology].CAMP.FLNparams.MinLN = 9
            //[Phenology].CAMP.FLNparams.PpLN = -3
            //[Phenology].CAMP.FLNparams.VrnLN = 6
            //[Phenology].CAMP.FLNparams.VxPLN = -9
            //[Phenology].Phyllochron.BasePhyllochron.FixedValue = 123.1871156
            //[Phenology].PhyllochronPpSensitivity.FixedValue = 0.106688704
            //[Phenology].CAMP.EnvData.VrnTreatTemp = 5.8
            //[Phenology].HeadEmergenceLongDayBase.FixedValue = 50
            //[Phenology].HeadEmergencePpSensitivity.FixedValue = 0
        Cultivar Stirling
          Command:
            [Phenology].CAMP.FLNparams.MinLN = 7
            [Phenology].CAMP.FLNparams.PpLN = 2
            [Phenology].CAMP.FLNparams.VrnLN = 0.375 // 0
            [Phenology].CAMP.FLNparams.VxPLN = -2
            [Phenology].Phyllochron.BasePhyllochron.FixedValue = 74.2 // 76.7
            [Phenology].PhyllochronPpSensitivity.FixedValue = 0.45 // 0.6
            [Phenology].CAMP.EnvData.VrnTreatTemp = 5.8
            [Phenology].HeadEmergenceLongDayBase.FixedValue = 90 // 110 // 130
            [Phenology].HeadEmergencePpSensitivity.FixedValue = 6.5 // 6
            //[Phenology].CAMP.FLNparams.MinLN = 8
            //[Phenology].CAMP.FLNparams.PpLN = 3
            //[Phenology].CAMP.FLNparams.VrnLN = 0
            //[Phenology].CAMP.FLNparams.VxPLN = -2
            //[Phenology].Phyllochron.BasePhyllochron.FixedValue = 76.70827864
            //[Phenology].PhyllochronPpSensitivity.FixedValue = 0.636329125
            //[Phenology].CAMP.EnvData.VrnTreatTemp = 5.8
            //[Phenology].HeadEmergenceLongDayBase.FixedValue = 50
            //[Phenology].HeadEmergencePpSensitivity.FixedValue = 4
        Cultivar Westminster
          Command:
            [Phenology].CAMP.FLNparams.MinLN = 8
            [Phenology].CAMP.FLNparams.PpLN = 0 // 2
            [Phenology].CAMP.FLNparams.VrnLN = 1 // 0
            [Phenology].CAMP.FLNparams.VxPLN = -0.875 // -1
            [Phenology].Phyllochron.BasePhyllochron.FixedValue = 115 // 95
            [Phenology].PhyllochronPpSensitivity.FixedValue = 0 // 0.5
            [Phenology].CAMP.EnvData.VrnTreatTemp = 5.8
            [Phenology].HeadEmergenceLongDayBase.FixedValue = 70 // 190 // 250
            [Phenology].HeadEmergencePpSensitivity.FixedValue = 5.625 // 5
            //[Phenology].CAMP.FLNparams.MinLN = 9
            //[Phenology].CAMP.FLNparams.PpLN = -3
            //[Phenology].CAMP.FLNparams.VrnLN = 7
            //[Phenology].CAMP.FLNparams.VxPLN = -10
            //[Phenology].Phyllochron.BasePhyllochron.FixedValue = 130.4668887
            //[Phenology].PhyllochronPpSensitivity.FixedValue = 0.146837949
            //[Phenology].CAMP.EnvData.VrnTreatTemp = 5.8
            //[Phenology].HeadEmergenceLongDayBase.FixedValue = 50
            //[Phenology].HeadEmergencePpSensitivity.FixedValue = 1
        Cultivar Yagan
          Command:
            [Phenology].CAMP.FLNparams.MinLN = 7
            [Phenology].CAMP.FLNparams.PpLN = 2
            [Phenology].CAMP.FLNparams.VrnLN = 0.125 // 0
            [Phenology].CAMP.FLNparams.VxPLN = 0
            [Phenology].Phyllochron.BasePhyllochron.FixedValue = 85 // 90
            [Phenology].PhyllochronPpSensitivity.FixedValue = 0.45
            [Phenology].CAMP.EnvData.VrnTreatTemp = 5.8
            [Phenology].HeadEmergenceLongDayBase.FixedValue = 95 // 70 // 210
            [Phenology].HeadEmergencePpSensitivity.FixedValue = 8
            //[Phenology].CAMP.FLNparams.MinLN = 7
            //[Phenology].CAMP.FLNparams.PpLN = 3
            //[Phenology].CAMP.FLNparams.VrnLN = 1
            //[Phenology].CAMP.FLNparams.VxPLN = -2
            //[Phenology].Phyllochron.BasePhyllochron.FixedValue = 99.45937465
            //[Phenology].PhyllochronPpSensitivity.FixedValue = 0.396778567
            //[Phenology].CAMP.EnvData.VrnTreatTemp = 5.8
            //[Phenology].HeadEmergenceLongDayBase.FixedValue = 190
            //[Phenology].HeadEmergencePpSensitivity.FixedValue = 7
        Cultivar LaTrobe
          Command:
            [Phenology].CAMP.FLNparams.MinLN = 8.25
            [Phenology].CAMP.FLNparams.PpLN = 1.375
            [Phenology].CAMP.FLNparams.VrnLN = 0.125
            [Phenology].CAMP.FLNparams.VxPLN = 0.375
            [Phenology].Phyllochron.BasePhyllochron.FixedValue = 89.5
            [Phenology].PhyllochronPpSensitivity.FixedValue = 0.675
            [Phenology].HeadEmergenceLongDayBase.FixedValue = 70
            [Phenology].HeadEmergencePpSensitivity.FixedValue = 2.125
            [Phenology].CAMP.EnvData.VrnTreatTemp = 5.8
        Cultivar Maximus: same as Replacements.Barley.FittedCultivars.LaTrobe
  Virtual: FileName=%root%/Tests/Validation/Barley/Barley.apsimx; ModelPaths=[[Simulations]]
