Simulations: Version=2
  Replacements
    Plant Brassica: CropType=Brassica
      Phenology: DaysAfterSowing=0
        AirTemperatureFunction ThermalTime
          XYPairs: X=[0, 26, 37]; Y=[0, 26, 0]
          Memo
            Thermal time determines the rate of developmental progress through many of the crops phases and is used by organs to determing potential growth rates.
        AirTemperatureFunction DailyVernalisation
          XYPairs: X=[0, 8, 16]; Y=[0, 1, 0]
          Memo
            Thermal time determines the rate of developmental progress through many of the crops phases and is used by organs to determing potential growth rates.
        AccumulateFunction AccumVernalisation: StartStageName=FirstVernalisation; EndStageName=SecondVernalisation
          VariableReference Vernalisation: VariableName=[Phenology].DailyVernalisation.Value
        PhotoperiodFunction Photoperiod: Twilight=-6; DayLength=0
        GerminatingPhase Germinating: Start=Sowing; End=Germination
        EmergingPhase Emerging: Start=Germination; End=Emergence; ShootLag=40; ShootRate=1.5
          VariableReference ThermalTime: VariableName=[Phenology].ThermalTime.Value
        GenericPhase ObligateInduction: Start=Emergence; End=FirstVernalisation
          Memo
            This phase will have a length of zero for spring varieties and a length > 0 for winter varieties.
            Although it has a TheremalTime propertiy, this is actually Vernalisation.  It takes Vernal days each day and sums them until the sum equals the target, then it proceeds to the next phase
          VariableReference ThermalTime: VariableName=[Phenology].DailyVernalisation.Value
          Constant Target: Value=0
        GenericPhase FacultativeInduction: Start=FirstVernalisation; End=SecondVernalisation
          VariableReference ThermalTime: VariableName=[Phenology].ThermalTime.Value
          LinearInterpolationFunction Target: XProperty=[Phenology].AccumVernalisation.Value
            XYPairs: X=[0, 25]; Y=[200, 0]
          Memo
            This phase has a maximum thermal time duration that gradually decreases as vernal days are accumulated
        GenericPhase PhotoSensitive: Start=SecondVernalisation; End=FloralInitiation
          VariableReference ThermalTime: VariableName=[Phenology].ThermalTime.Value
          LinearInterpolationFunction Target: XProperty=[Phenology].Photoperiod.Value
            XYPairs: X=[10, 16]; Y=[200, 50]
          Memo
            This phase has a thermalTime target that changes in response to photoperiod
        GenericPhase FlowerDevelopment: Start=Greenbud; End=StartFlowering
          VariableReference ThermalTime: VariableName=[Phenology].ThermalTime.Value
          LinearInterpolationFunction Target: XProperty=[Phenology].Photoperiod.Value
            XYPairs: X=[10, 16]; Y=[200, 50]
        GenericPhase Flowering: Start=StartFlowering; End=EndFlowering
          Constant Target: Value=120
          VariableReference ThermalTime: VariableName=[Phenology].ThermalTime.Value
        GenericPhase GrainFilling: Start=EndFlowering; End=EndGrainFill
          Constant Target: Value=545
          VariableReference ThermalTime: VariableName=[Phenology].ThermalTime.Value
        GenericPhase Maturing: Start=EndGrainFill; End=Maturity
          Constant Target: Value=35
          VariableReference ThermalTime: VariableName=[Phenology].ThermalTime.Value
        GenericPhase Ripening: Start=Maturity; End=HarvestRipe
          Constant Target: Value=300
          VariableReference ThermalTime: VariableName=[Phenology].ThermalTime.Value
        EndPhase ReadyForHarvesting: Start=HarvestRipe; End=Unused
          VariableReference ThermalTime: VariableName=[Phenology].ThermalTime.Value
        OnEventFunction FloralInitiationDAS: SetEvent=FloralInitiation; ReSetEvent=never
          Memo
            A function is used to provide flowering date as days after sowing(DAS).
          Constant PreEventValue: Value=0
          VariableReference PostEventValue: VariableName=[Phenology].DaysAfterSowing
        OnEventFunction GreenBudDAS: SetEvent=Greenbud; ReSetEvent=never
          Memo
            A function is used to provide flowering date as days after sowing(DAS).
          Constant PreEventValue: Value=0
          VariableReference PostEventValue: VariableName=[Phenology].DaysAfterSowing
        OnEventFunction FloweringDAS: SetEvent=StartFlowering; ReSetEvent=never
          Memo
            A function is used to provide maturity date as days after sowing(DAS).
          Constant PreEventValue: Value=0
          VariableReference PostEventValue: VariableName=[Phenology].DaysAfterSowing
      CultivarFolder Cultivars
        CultivarFolder Australia
          Cultivar Can1
  DataStore
  Experiment OptExpt
    Factors
      Factor ObVrnReq: Specifications=[SetOblPhase].Script.ObPhaseTarget = 0,15
      Factor FacPhaSens: Specifications=[SetFacPhase]
        Manager High
          FacPhaseX = 0,25
          FacPhaseY = 200,0
```csharp
using System;
using Models.Core;
using Models.PMF;
using APSIM.Shared.Utilities;
using System.Xml.Serialization;
        
namespace Models
{
	[Serializable] 
	[System.Xml.Serialization.XmlInclude(typeof(Model))]
	public class Script : Model
	{
		[Link] Zone zone;
		
		[Description("Amount of Vernal Days accumulated")]
		public double[] FacPhaseX { get; set; }
		[Description("TT duration of the FacPhase in response the vernal day accumulation")]
		public double[] FacPhaseY { get; set; }
		
		[XmlIgnore] public bool Sown { get; set; }
		
		[EventSubscribe("Commencing")]
		private void OnSimulationCommencing(object sender, EventArgs e)
		{
			Sown = false;
		}
		
		[EventSubscribe("DoManagement")]
		private void OnDoManagement(object sender, EventArgs e)
		{
			if (Sown == false)
			{
				Sown = true;
				zone.Set("Brassica.Phenology.FacultativeInduction.Target.XYPairs.X", FacPhaseX);
				zone.Set("Brassica.Phenology.FacultativeInduction.Target.XYPairs.Y", FacPhaseY);
			}
		}
	}
}
```
        Manager Mid
          FacPhaseX = 0,25
          FacPhaseY = 200,100
          script: same as in OptExpt.Factors.FacPhaSens.High
        Manager None
          FacPhaseX = 0,25
          FacPhaseY = 200,200
          script: same as in OptExpt.Factors.FacPhaSens.High
      Factor PhotoPhaSens: Specifications=[SetPhotoPhase]
        Manager High
          PhotoPhaseX = 10,16
          PhotoPhaseY = 200,50
```csharp
using System;
using Models.Core;
using Models.PMF;
using APSIM.Shared.Utilities;
using System.Xml.Serialization;
        
namespace Models
{
	[Serializable] 
	[System.Xml.Serialization.XmlInclude(typeof(Model))]
	public class Script : Model
	{
		[Link] Zone zone;
		
		[Description("Photoperiod")]
		public double[] PhotoPhaseX { get; set; }
		[Description("TT duration of the PhotoSensitive phase in response to photoperiod")]
		public double[] PhotoPhaseY { get; set; }
		
		[XmlIgnore] public bool Sown { get; set; }
		
		[EventSubscribe("Commencing")]
		private void OnSimulationCommencing(object sender, EventArgs e)
		{
			Sown = false;
		}
		
		[EventSubscribe("DoManagement")]
		private void OnDoManagement(object sender, EventArgs e)
		{
			if (Sown == false)
			{
				Sown = true;
				zone.Set("Brassica.Phenology.PhotoSensitive.Target.XYPairs.X", PhotoPhaseX);
				zone.Set("Brassica.Phenology.PhotoSensitive.Target.XYPairs.Y", PhotoPhaseY);
			}	
		}
	}
}
```
        Manager Mid
          PhotoPhaseX = 10,16
          PhotoPhaseY = 200,125
          script: same as in OptExpt.Factors.PhotoPhaSens.High
        Manager None
          PhotoPhaseX = 10,16
          PhotoPhaseY = 200,200
          script: same as in OptExpt.Factors.PhotoPhaSens.High
      Factor Location
        Factor GoodNwindy: Specifications=[Weather].FileName = Goond.met
        Factor Lincoln: Specifications=[Weather].FileName = Lincoln.met
      Factor Sowing: Specifications=[Clock].StartDate = 1970-03-01,1970-06-01,1970-09-01
    Simulation BaseCanola: Area=0; Slope=0
      Clock: StartDate=1970-06-08; EndDate=1972-07-01
      Summary summaryfile
      Weather: FileName=Goond.met
      Zone paddock: Area=1; Slope=0
        Plant Brassica: CropType=Brassica
        Manager SowAndTerminate
```csharp
using System;
using Models.Core;
using Models.PMF;
using APSIM.Shared.Utilities;
using System.Xml.Serialization;
        
namespace Models
{
	[Serializable] 
	[System.Xml.Serialization.XmlInclude(typeof(Model))]
	public class Script : Model
	{
		[Link] Plant Brassica;
		[Link] Clock Clock;
		[Link] Simulation sim;
		[Link] Summary Summary;
	
		[XmlIgnore] public bool Sown { get; set; }
		[XmlIgnore] public bool Harvested { get; set; }
		[XmlIgnore] public bool EndSet { get; set; }
		
		[EventSubscribe("Commencing")]
		private void OnSimulationCommencing(object sender, EventArgs e)
		{
			Sown = false;
			Harvested = false;
			EndSet = false;
		}
		
		[EventSubscribe("DoManagement")]
		private void OnDoManagement(object sender, EventArgs e)
		{
			if (Sown == false)
			{
				Brassica.Sow(population: 200, cultivar: "Can1", depth: 15, rowSpacing: 150, budNumber: 1);
				Sown = true;
			}
			
			if (Brassica.Phenology.CurrentPhaseName == "GrainFilling")
			{
				Brassica.Harvest();
				Brassica.EndCrop();
				Harvested = true;
				Summary.WriteMessage(this, "Flowering reached so setting end date to stop simulation");
			}
			
			if ((Harvested == true) && (EndSet == false))
			{
				sim.Set("Clock.EndDate", Clock.Today.AddDays(1));
				EndSet = true;
			}
		}
	}
}
```
        Manager SetOblPhase
          ObPhaseTarget = 0
```csharp
using System;
using Models.Core;
using Models.PMF;
using APSIM.Shared.Utilities;
using System.Xml.Serialization;
        
namespace Models
{
	[Serializable] 
	[System.Xml.Serialization.XmlInclude(typeof(Model))]
	public class Script : Model
	{
		[Link] Zone zone;
		
		[Description("TT length of obligate phase")]
		public string ObPhaseTarget { get; set; }
		
		[XmlIgnore] public bool Sown { get; set; }
		
		[EventSubscribe("Commencing")]
		private void OnSimulationCommencing(object sender, EventArgs e)
		{
			Sown = false;
		}
		
		[EventSubscribe("DoManagement")]
		private void OnDoManagement(object sender, EventArgs e)
		{
			if (Sown == false)
			{
				Sown = true;
				zone.Set("Brassica.Phenology.ObligateInduction.Target.Value", ObPhaseTarget);
			}
		}
	}
}
```
        Manager SetFacPhase: same as OptExpt.Factors.FacPhaSens.High
        Manager SetPhotoPhase: same as OptExpt.Factors.PhotoPhaSens.High
        Report DailyReport: EventNames=[Clock].DoReport
          VariableNames:
            [Clock].Today
            [Brassica].Phenology.CurrentPhaseName
            [Brassica].Phenology.CurrentStageName
            [Brassica].Phenology.DailyVernalisation.Value
            [Brassica].Phenology.Photoperiod.Value
            [Brassica].Phenology.Stage
            [Brassica].Phenology.ThermalTime.Value
            [Brassica].Phenology.DaysAfterSowing
        Report HarvestReport: EventNames=[Brassica].Harvesting
          VariableNames:
            [Clock].Today
            [Brassica].Phenology.CurrentPhaseName
            [Brassica].Phenology.CurrentStageName
            [Brassica].Phenology.FloralInitiationDAS.Value
            [Brassica].Phenology.GreenBudDAS.Value
            [Brassica].Phenology.FloweringDAS.Value
            [Brassica].SowingData.Cultivar
            [Brassica].SowingDate.DayOfYear
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