Simulations: Version=46
  DataStore
  Simulation GrowCrop
    Clock: StartDate=2001-09-01; EndDate=2009-12-31
    Summary summaryfile
    FileCrop: FileName=Crop_new_format(Burkina 20130222).prn
    FileCrop FileCropResidue: FileName=CropResidue_new_format(Burkina 20130222).prn
    ZoneCLEM CLEM: Area=0; Slope=0; RandomSeed=0; ClimateRegion=0; EcologicalIndicatorsCalculationMonth=12
      ResourcesHolder Resources
        Land
          LandType Field: LandArea=1; SoilType=3
        AnimalFoodStore
          AnimalFoodStoreType Maize: DMD=51; Nitrogen=1.5; StartingAmount=0
          AnimalFoodStoreType Maize stover: DMD=46; Nitrogen=1; StartingAmount=0
      ActivitiesHolder Activities
        CropActivityManageCrop Manage maize: OnPartialResourcesAvailableAction=ReportErrorAndStop; LandItemNameToUse=Land.Field; AreaRequested=1; UseAreaAvailable=true
          CropActivityManageProduct Manage grain: OnPartialResourcesAvailableAction=ReportErrorAndStop; ModelNameFileCrop=FileCrop; CropName=Maize_local; StoreItemName=AnimalFoodStore.Maize; ProportionKept=1; TreesPerHa=0; UnitsToHaConverter=0
            CropActivityManageProduct Manage residue: OnPartialResourcesAvailableAction=ReportErrorAndStop; ModelNameFileCrop=FileCropResidue; CropName=Maize_local_Stover; StoreItemName=AnimalFoodStore.Maize stover; ProportionKept=1; TreesPerHa=0; UnitsToHaConverter=0
      Folder Reports
        Report LandLedger: EventNames=[Resources].Land.TransactionOccurred
          VariableNames:
            [Clock].Today as Date
            [Resources].Land.LastTransaction.Credit as Credit
            [Resources].Land.LastTransaction.Debit as Debit
            [Resources].Land.LastTransaction.ResourceType as Resource
            [Resources].Land.LastTransaction.Activity as Activity
            [Resources].Land.LastTransaction.Reason as Reason
        ReportActivitiesPerformed
        Report AnimalFoodLedger: EventNames=[Resources].AnimalFoodStore.TransactionOccurred
          VariableNames:
            [Clock].Today as Date
            [Resources].AnimalFoodStore.LastTransaction.Credit as Credit
            [Resources].AnimalFoodStore.LastTransaction.Debit as Debit
            [Resources].AnimalFoodStore.LastTransaction.ResourceType as Resource
            [Resources].AnimalFoodStore.LastTransaction.Activity as Activity
            [Resources].AnimalFoodStore.LastTransaction.Reason as Reason
        ReportResourceBalances: EventNames=[Clock].CLEMEndOfTimeStep
          VariableNames:
            [Clock].Today
            Land
            AnimalFoodStore
  Simulation GrowCropWithSales
    Clock: StartDate=1995-01-01; EndDate=2009-12-31
    Summary summaryfile
    FileCrop: FileName=Crop_new_format(Burkina 20130222).prn
    FileCrop FileCropResidue: FileName=CropResidue_new_format(Burkina 20130222).prn
    ZoneCLEM CLEM: Area=0; Slope=0; RandomSeed=0; ClimateRegion=0; EcologicalIndicatorsCalculationMonth=12
      ResourcesHolder Resources
        Land
          LandType Field: LandArea=100; SoilType=3
        Finance Finances
          FinanceType General account: OpeningBalance=10000000; EnforceWithdrawalLimit=false; WithdrawalLimit=0; InterestRateCharged=7.5; InterestRatePaid=2
        AnimalFoodStore
          AnimalFoodStoreType Maize: DMD=51; Nitrogen=1.5; StartingAmount=0
          AnimalFoodStoreType Maize stover: DMD=46; Nitrogen=1; StartingAmount=0
        ProductStore
          ProductStoreType Maize: StartingAmount=0
      ActivitiesHolder Activities
        CropActivityManageCrop Manage maize: OnPartialResourcesAvailableAction=ReportErrorAndStop; LandItemNameToUse=Land.Field; AreaRequested=1; UseAreaAvailable=true
          CropActivityManageProduct Manage grain: OnPartialResourcesAvailableAction=ReportErrorAndStop; ModelNameFileCrop=FileCrop; CropName=Maize_local; StoreItemName=AnimalFoodStore.Maize; ProportionKept=1; TreesPerHa=0; UnitsToHaConverter=0
            CropActivityManageProduct Manage residue: OnPartialResourcesAvailableAction=ReportErrorAndStop; ModelNameFileCrop=FileCropResidue; CropName=Maize_local_Stover; StoreItemName=AnimalFoodStore.Maize stover; ProportionKept=0.85; TreesPerHa=0; UnitsToHaConverter=0
        ResourceActivitySell Sell maize: OnPartialResourcesAvailableAction=ReportErrorAndStop; AccountName=Finances.General account; ResourceTypeName=AnimalFoodStore.Maize; AmountReserved=0
      Folder Reports
        Report FinancesLedger: EventNames=[Resources].Finances.TransactionOccurred
          VariableNames:
            [Clock].Today as Date
            [Resources].Finances.LastTransaction.Credit as Credit
            [Resources].Finances.LastTransaction.Debit as Debit
            [Resources].Finances.LastTransaction.ResourceType as Resource
            [Resources].Finances.LastTransaction.Activity as Activity
            [Resources].Finances.LastTransaction.Reason as Reason
        Report ResourceShortfallLedger: EventNames=[Activities].ResourceShortfallOccurred
          VariableNames:
            [Clock].Today as Date
            [Activities].LastShortfallResourceRequest.ResourceTypeName as Resource
            [Activities].LastShortfallResourceRequest.ActivityModel.Name as Activity
            [Activities].LastShortfallResourceRequest.Reason as Reason
            [Activities].LastShortfallResourceRequest.Required as Required
            [Activities].LastShortfallResourceRequest.Available as Available
        Report AnimalFoodStoreLedger: same as GrowCrop.CLEM.Reports.AnimalFoodLedger
        Report LandLedger: same as GrowCrop.CLEM.Reports.LandLedger
        Report ActivityLedger: EventNames=[Activities].ActivityPerformed
          VariableNames:
            [Clock].Today as Date
            [Activities].LastActivityPerformed.Name as Name
            [Activities].LastActivityPerformed.Status.ToString() as Status
        ReportActivitiesPerformed
  Simulation GrowCropWithTasks
    Clock: StartDate=1995-01-01; EndDate=2009-12-31
    Summary summaryfile
    FileCrop: FileName=Crop_new_format(Burkina 20130222).prn
    FileCrop FileCropResidue: FileName=CropResidue_new_format(Burkina 20130222).prn
    ZoneCLEM CLEM: Area=0; Slope=0; RandomSeed=0; ClimateRegion=0; EcologicalIndicatorsCalculationMonth=12
      ResourcesHolder Resources
        Land
          LandType Field: LandArea=100; SoilType=3
        Finance Finances: CurrencyName=Dollars
          FinanceType General account: OpeningBalance=1000000; EnforceWithdrawalLimit=false; WithdrawalLimit=0; InterestRateCharged=7.5; InterestRatePaid=2
        Labour: AllowAging=true
          LabourType Joe B: InitialAge=42; Gender=Male; Individuals=1
          LabourAvailabilityList
            LabourAvailabilityItem Male: Value=10
        AnimalFoodStore
          AnimalFoodStoreType Maize: DMD=51; Nitrogen=1.5; StartingAmount=0
          AnimalFoodStoreType Maize stover: DMD=46; Nitrogen=1; StartingAmount=0
      ActivitiesHolder Activities
        CropActivityManageCrop Manage maize: OnPartialResourcesAvailableAction=ReportErrorAndStop; LandItemNameToUse=Land.Field; AreaRequested=1; UseAreaAvailable=true
          CropActivityManageProduct Manage grain: OnPartialResourcesAvailableAction=ReportErrorAndStop; ModelNameFileCrop=FileCrop; CropName=Maize_local; StoreItemName=AnimalFoodStore.Maize; ProportionKept=0; TreesPerHa=0; UnitsToHaConverter=0
            CropActivityTask Prepare field: OnPartialResourcesAvailableAction=UseResourcesAvailable
              ActivityTimerCropHarvest 7 mths before harvest: OffsetMonthHarvestStart=0; OffsetMonthHarvestStop=0
            CropActivityTask Sow seeds: OnPartialResourcesAvailableAction=UseResourcesAvailable
              ActivityTimerCropHarvest 6 mths before harvest: OffsetMonthHarvestStart=0; OffsetMonthHarvestStop=0
              CropActivityFee Purchase seeds: OnPartialResourcesAvailableAction=UseResourcesAvailable; AccountName=Finances.General account; Amount=10
            CropActivityTask Perform irrigation: OnPartialResourcesAvailableAction=UseResourcesAvailable
              ActivityTimerCropHarvest From plant to harvest: OffsetMonthHarvestStart=-6; OffsetMonthHarvestStop=0
            CropActivityTask Harvest: OnPartialResourcesAvailableAction=UseResourcesAvailable
              ActivityTimerCropHarvest At harvest: OffsetMonthHarvestStart=0; OffsetMonthHarvestStop=0
          CropActivityManageProduct Manage residue: OnPartialResourcesAvailableAction=ReportErrorAndStop; ModelNameFileCrop=FileCropResidue; CropName=Maize_local_Stover; StoreItemName=AnimalFoodStore.Maize stover; ProportionKept=0; TreesPerHa=0; UnitsToHaConverter=0
            CropActivityTask Cut and carry: OnPartialResourcesAvailableAction=UseResourcesAvailable
              ActivityTimerCropHarvest At harvest residue: OffsetMonthHarvestStart=0; OffsetMonthHarvestStop=0
        ResourceActivitySell Sell maize: OnPartialResourcesAvailableAction=UseResourcesAvailable; AccountName=Finances.General account; ResourceTypeName=AnimalFoodStore.Maize; AmountReserved=400
      Folder Reports
        Report FinancesLedger: same as GrowCropWithSales.CLEM.Reports.FinancesLedger
        Report ResourceShortfallLedger: same as GrowCropWithSales.CLEM.Reports.ResourceShortfallLedger
        ReportResourceShortfalls
        Report AnimalFoodStoreLedger: same as GrowCrop.CLEM.Reports.AnimalFoodLedger
        Report LandLedger: same as GrowCrop.CLEM.Reports.LandLedger
        Report ActivityLedger: EventNames=[Activities].ActivityPerformed
          VariableNames:
            [Clock].Today as Date
            [Activities].LastActivityPerformed.Name as Name
            [Activities].LastActivityPerformed.Status.ToString() as Status
        Report ExcessLabour: EventNames=[Clock].EndOfMonth
          VariableNames:
            [Clock].Today as Date
            [Resources].Labour.Available as Excess
        ReportActivitiesPerformed
  Simulation GrowCropWithDateLimited
    Clock: StartDate=1995-01-01; EndDate=2009-12-31
    Summary summaryfile
    ZoneCLEM CLEM: Area=0; Slope=0; RandomSeed=0; ClimateRegion=0; EcologicalIndicatorsCalculationMonth=12
      ResourcesHolder Resources
        Land
          LandType Field: LandArea=100; SoilType=3
        Finance Finances
          FinanceType General account: OpeningBalance=10000000; EnforceWithdrawalLimit=false; WithdrawalLimit=0; InterestRateCharged=7.5; InterestRatePaid=2
        AnimalFoodStore
          AnimalFoodStoreType Maize: DMD=51; Nitrogen=1.5; StartingAmount=0
          AnimalFoodStoreType Maize stover: DMD=46; Nitrogen=1; StartingAmount=0
        Labour: AllowAging=true
          LabourType Joe B: InitialAge=42; Gender=Male; Individuals=1
          LabourAvailabilityList
            LabourAvailabilityItem Male: Value=10
      ActivitiesHolder Activities
        ActivityTimerDateRange: StartDate=2007-01-01; EndDate=2100-01-01; Invert=false
        CropActivityManageCrop Manage maize: OnPartialResourcesAvailableAction=ReportErrorAndStop; LandItemNameToUse=Land.Field; AreaRequested=1; UseAreaAvailable=true
          CropActivityManageProduct Manage grain: OnPartialResourcesAvailableAction=ReportErrorAndStop; ModelNameFileCrop=FileCrop; CropName=Maize_local; StoreItemName=AnimalFoodStore.Maize; ProportionKept=1; TreesPerHa=0; UnitsToHaConverter=0
            CropActivityTask Prepare field: OnPartialResourcesAvailableAction=UseResourcesAvailable
              ActivityTimerCropHarvest 7 mths before harvest: OffsetMonthHarvestStart=0; OffsetMonthHarvestStop=0
            CropActivityTask Sow seeds: OnPartialResourcesAvailableAction=UseResourcesAvailable
              ActivityTimerCropHarvest 6 mths before harvest: OffsetMonthHarvestStart=0; OffsetMonthHarvestStop=0
              CropActivityFee Purchase seeds: OnPartialResourcesAvailableAction=UseResourcesAvailable; AccountName=Finances.General account; Amount=100
            CropActivityTask Perform irrigation: OnPartialResourcesAvailableAction=UseResourcesAvailable
              ActivityTimerCropHarvest From plant to harvest: OffsetMonthHarvestStart=0; OffsetMonthHarvestStop=0
            CropActivityTask Harvest: OnPartialResourcesAvailableAction=UseResourcesAvailable
              ActivityTimerCropHarvest At harvest: OffsetMonthHarvestStart=0; OffsetMonthHarvestStop=0
            CropActivityManageProduct Manage residue: OnPartialResourcesAvailableAction=ReportErrorAndStop; ModelNameFileCrop=FileCropResidue; CropName=Maize_local_Stover; StoreItemName=AnimalFoodStore.Maize; ProportionKept=1; TreesPerHa=0; UnitsToHaConverter=0
              CropActivityTask Cut and carry: OnPartialResourcesAvailableAction=UseResourcesAvailable
                ActivityTimerCropHarvest At harvest: OffsetMonthHarvestStart=0; OffsetMonthHarvestStop=0
        ResourceActivitySell Sell maize: OnPartialResourcesAvailableAction=UseResourcesAvailable; AccountName=Finances.General account; ResourceTypeName=AnimalFoodStore.Maize; AmountReserved=0
      Folder Reports
        Report FinancesLedger: same as GrowCropWithSales.CLEM.Reports.FinancesLedger
        Report ResourceShortfallLedger: same as GrowCropWithSales.CLEM.Reports.ResourceShortfallLedger
        Report AnimalFoodStoreLedger: same as GrowCrop.CLEM.Reports.AnimalFoodLedger
        Report LandLedger: same as GrowCrop.CLEM.Reports.LandLedger
        Report ActivityLedger: EventNames=[Activities].ActivityPerformed
          VariableNames:
            [Clock].Today as Date
            [Activities].LastActivityPerformed.Name as Name
            [Activities].LastActivityPerformed.Status.ToString() as Status
    FileCrop: FileName=Crop_new_format(Burkina 20130222).prn
    FileCrop FileCropResidue: FileName=CropResidue_new_format(Burkina 20130222).prn
  Simulation NewReports
    Clock: StartDate=1995-01-01; EndDate=2009-12-31
    Summary summaryfile
    ZoneCLEM CLEM: Area=0; Slope=0; RandomSeed=0; ClimateRegion=0; EcologicalIndicatorsCalculationMonth=12
      ResourcesHolder Resources
        Land
          LandType Field: LandArea=100; SoilType=3
        AnimalFoodStore
          AnimalFoodStoreType Maize: DMD=51; Nitrogen=1.5; StartingAmount=0
          AnimalFoodStoreType Maize stover: DMD=46; Nitrogen=1; StartingAmount=0
      ActivitiesHolder Activities
        CropActivityManageCrop Manage maize: OnPartialResourcesAvailableAction=ReportErrorAndStop; LandItemNameToUse=Land.Field; AreaRequested=1; UseAreaAvailable=true
          CropActivityManageProduct Manage grain: OnPartialResourcesAvailableAction=ReportErrorAndStop; ModelNameFileCrop=FileCrop; CropName=Maize_local; StoreItemName=AnimalFoodStore.Maize; ProportionKept=0; TreesPerHa=0; UnitsToHaConverter=0
          CropActivityManageProduct Manage residue: OnPartialResourcesAvailableAction=ReportErrorAndStop; ModelNameFileCrop=FileCropResidue; CropName=Maize_local_Stover; StoreItemName=AnimalFoodStore.Maize stover; ProportionKept=0; TreesPerHa=0; UnitsToHaConverter=0
      Folder Reports
        Report ResourceShortfallLedger: same as GrowCropWithSales.CLEM.Reports.ResourceShortfallLedger
        Report AnimalFoodStoreLedger: same as GrowCrop.CLEM.Reports.AnimalFoodLedger
        Report LandLedger: same as GrowCrop.CLEM.Reports.LandLedger
        ReportActivitiesPerformed
        ReportResourceBalances: EventNames=[Clock].CLEMEndOfTimeStep
          VariableNames:
            [Clock].Today
            Land
            AnimalFoodStore
        ReportResourceShortfalls
    FileCrop: FileName=Crop_new_format(Burkina 20130222).prn
    FileCrop FileCropResidue: FileName=CropResidue_new_format(Burkina 20130222).prn
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