Simulations: Version=22
  DataStore
  Simulation BankTest
    Clock: StartDate=1995-01-01; EndDate=2009-12-31
    Summary summaryfile
    ZoneCLEM CLEM: Area=1; Slope=0; ClimateRegion=0; EcologicalIndicatorsCalculationMonth=9
      ResourcesHolder Resources
        Finance Finances
          FinanceType General account: OpeningBalance=10000000; EnforceWithdrawalLimit=false; WithdrawalLimit=0; InterestRateCharged=7.5; InterestRatePaid=2
          FinanceType Overheads account: OpeningBalance=900000; EnforceWithdrawalLimit=false; WithdrawalLimit=0; InterestRateCharged=7.5; InterestRatePaid=2
      ActivitiesHolder Activities
        FinanceActivityCalculateInterest Bank interest: OnPartialResourcesAvailableAction=ReportErrorAndStop
        ActivityFolder Pay January expenses: OnPartialResourcesAvailableAction=ReportErrorAndStop
          ActivityTimerInterval Perform every January
          FinanceActivityPayExpense Pay electricity: OnPartialResourcesAvailableAction=UseResourcesAvailable; Amount=150; AccountName=General account; IsOverhead=false
          FinanceActivityPayExpense Pay internet: OnPartialResourcesAvailableAction=UseResourcesAvailable; Amount=1200; AccountName=General account; IsOverhead=false
        FinanceActivityPayExpense Pay mechanic: OnPartialResourcesAvailableAction=UseResourcesAvailable; Amount=999; AccountName=Overheads account; IsOverhead=true
          ActivityTimerDateRange Between98and04: StartDate=1998-01-01; EndDate=2004-01-01; Invert=false
        ActivityFolder Cash flow: OnPartialResourcesAvailableAction=ReportErrorAndStop
          FinanceActivityPayExpense Pay general farm maintenance: OnPartialResourcesAvailableAction=ReportErrorAndStop; Amount=3333.33; AccountName=General account; IsOverhead=false
          FinanceActivityPayExpense Pay fuel costs: OnPartialResourcesAvailableAction=ReportErrorAndStop; Amount=2500; AccountName=General account; IsOverhead=false
          FinanceActivityPayExpense Pay pest control: OnPartialResourcesAvailableAction=ReportErrorAndStop; Amount=5000; AccountName=General account; IsOverhead=false
            ActivityTimerMonthRange BetweenAprAndSept: StartMonth=4; EndMonth=9
          FinanceActivityPayExpense Pay contractors: OnPartialResourcesAvailableAction=ReportErrorAndStop; Amount=30000; AccountName=General account; IsOverhead=false
            ActivityTimerInterval: MonthDue=10
          FinanceActivityPayExpense Pay administration: OnPartialResourcesAvailableAction=ReportErrorAndStop; Amount=1666.67; AccountName=General account; IsOverhead=false
          FinanceActivityPayExpense Pay rates and fees: OnPartialResourcesAvailableAction=ReportErrorAndStop; Amount=15000; AccountName=General account; IsOverhead=false
            ActivityTimerInterval: MonthDue=6
          FinanceActivityPayExpense Pay insurance: OnPartialResourcesAvailableAction=ReportErrorAndStop; Amount=20000; AccountName=General account; IsOverhead=false
            ActivityTimerInterval: MonthDue=12
          FinanceActivityPayExpense Pay electricity: OnPartialResourcesAvailableAction=ReportErrorAndStop; Amount=2000; AccountName=General account; IsOverhead=false
            ActivityTimerInterval: Interval=3
          FinanceActivityPayExpense Pay living costs: OnPartialResourcesAvailableAction=ReportErrorAndStop; Amount=1000; AccountName=General account; IsOverhead=false
            ActivityTimerInterval: Interval=6; MonthDue=6
      Folder Reports
        Report FinancesLedger: EventNames=[Resources].Finances.TransactionOccurred
          VariableNames:
            [Clock].Today as Date
            [Resources].Finances.LastTransaction.Credit as Credit
            [Resources].Finances.LastTransaction.Debit as Debit
            [Resources].Finances.LastTransaction.ResourceType as Resource
            [Resources].Finances.LastTransaction.Activity as Activity
            [Resources].Finances.LastTransaction.Reason as Reason
        Report ActivityLedger: EventNames=[Activities].ActivityPerformed
          VariableNames:
            [Clock].Today as Date
            [Activities].LastActivityPerformed.Name as Name
            [Activities].LastActivityPerformed.Status as Status
        ReportActivitiesPerformed
