Simulations: Version=22
  DataStore
  Simulation PastureOnlySQL
    Clock: StartDate=1995-01-01; EndDate=2009-12-31
    Summary summaryfile
    ZoneCLEM CLEM: Area=1; Slope=0; ClimateRegion=0; EcologicalIndicatorsCalculationMonth=12
      ResourcesHolder Resources
        Land
          LandType Field: LandArea=100; SoilType=0
        GrazeFoodStore
          GrazeFoodStoreType NativePasture: NToDMDCoefficient=11.03; NToDMDIntercept=41.4; NToDMDCrudeProteinDenominator=0; GreenNitrogen=2; DecayNitrogen=0.1; MinimumNitrogen=0.4; DecayDMD=0.35; MinimumDMD=43; DetachRate=0.03; CarryoverDetachRate=0.12; IntakeTropicalQualityCoefficient=0.16; IntakeQualityCoefficient=1.7
      ActivitiesHolder Activities
        PastureActivityManage: OnPartialResourcesAvailableAction=ReportErrorAndStop; LandTypeNameToUse=Field; FeedTypeName=NativePasture; StartingAmount=1000; StartingStockingRate=0; AreaRequested=100
          Relationship LandConditionIndex: StartingValue=2; Minimum=1; Maximum=11; XValues=[0, 20, 30, 100]; YValues=[-0.625, -0.125, 0, 0.75]
          Relationship GrassBasalArea: StartingValue=2; Minimum=1; Maximum=5; XValues=[0, 20, 30, 100]; YValues=[-0.95, -0.15, 0, 1.05]
      Folder Reports
        Report GrazeFoodStoreLedger: EventNames=[Resources].GrazeFoodStore.TransactionOccurred
          VariableNames:
            [Clock].Today as Date
            [Resources].GrazeFoodStore.LastTransaction.Credit as Credit
            [Resources].GrazeFoodStore.LastTransaction.Debit as Debit
            [Resources].GrazeFoodStore.LastTransaction.ResourceType as Resource
            [Resources].GrazeFoodStore.LastTransaction.Activity as Activity
            [Resources].GrazeFoodStore.LastTransaction.Reason as Reason
        Report LandLedger: EventNames=[Resources].Land.TransactionOccurred
          VariableNames:
            [Clock].Today as Date
            [Resources].Land.LastTransaction.Credit as Credit
            [Resources].Land.LastTransaction.Debit as Debit
            [Resources].Land.LastTransaction.ResourceType as Resource
            [Resources].Land.LastTransaction.Activity as Activity
            [Resources].Land.LastTransaction.Reason as Reason
        ReportActivitiesPerformed
        ReportResourceBalances: EventNames=[Clock].CLEMEndOfTimeStep
          VariableNames:
            [Clock].Today
            Land
            GrazeFoodStore
        ReportResourceShortfalls
        ReportPasturePoolDetails
          VariableNames:
            [Clock].Today
            NativePasture.Amount
            NativePasture.DMD
            NativePasture.Nitrogen
    FileSQLiteGRASP FileGRASP
      FileName=C:\Data\Source\Repos\ApsimX\Prototypes\CLEM\NABSA_GRASP_NthQld_WdThck_Base.db
  Simulation PastureOnly
    Clock: StartDate=1995-01-01; EndDate=2009-12-31
    Summary summaryfile
    ZoneCLEM CLEM: Area=1; Slope=0; ClimateRegion=0; EcologicalIndicatorsCalculationMonth=12
      ResourcesHolder Resources: same as PastureOnlySQL.CLEM.Resources
      ActivitiesHolder Activities: same as PastureOnlySQL.CLEM.Activities
      Folder Reports
        Report GrazeFoodStoreLedger: same as PastureOnlySQL.CLEM.Reports.GrazeFoodStoreLedger
        Report LandLedger: same as PastureOnlySQL.CLEM.Reports.LandLedger
        ReportActivitiesPerformed
        ReportResourceBalances: EventNames=[Clock].CLEMEndOfTimeStep
          VariableNames:
            [Clock].Today
            Land
            GrazeFoodStore
        ReportResourceShortfalls
        ReportPasturePoolDetails
          VariableNames:
            [Clock].Today
            NativePasture.Amount
    FileGRASP: FileName=Nth Qld_Base_xx_WoodyThck_NABSAdb.csv
  Simulation PastureOneAnimal
    Clock: StartDate=1995-01-01; EndDate=2009-12-31
    Summary summaryfile
    ZoneCLEM CLEM: Area=1; Slope=0; ClimateRegion=0; EcologicalIndicatorsCalculationMonth=12
      ResourcesHolder Resources
        Land
          LandType Field: LandArea=100; SoilType=0
        GrazeFoodStore: same as PastureOnlySQL.CLEM.Resources.GrazeFoodStore
        RuminantHerd Ruminants
          RuminantType Bos indicus: Breed=Bos indicus; EMaintEfficiencyCoefficient=0.35; EMaintEfficiencyIntercept=0.503; EGrowthEfficiencyCoefficient=0.79; EGrowthEfficiencyIntercept=0; ELactationEfficiencyCoefficient=0.35; ELactationEfficiencyIntercept=0.42; EMaintExponent=8.2E-05; EMaintIntercept=0.09; EMaintCoefficient=0.26; Kme=1; GrowthEnergyIntercept1=6.7; GrowthEnergyIntercept2=20.3; GrowthEfficiency=1.09; SRWFemale=500; SRWMaleMultiplier=1.2; SRWBirth=0.08; AgeGrowthRateCoefficient=0.0115; SRWGrowthScalar=0.32; IntakeCoefficient=0.024; IntakeIntercept=1.7; ProteinCoefficient=120; ProteinDegradability=0.9; BaseAnimalEquivalent=450; GreenDietMax=0.98; GreenDietCoefficient=0.15; GreenDietZero=0.04; IntakeTropicalQuality=0.16; IntakeCoefficientQuality=1.7; IntakeCoefficientBiomass=0.006; StrictFeedingLimits=true; MilkIntakeCoefficient=0.1206; MilkIntakeIntercept=3.8146; MilkIntakeMaximum=20; MilkLWTFodderSubstitutionProportion=0.2; MaxJuvenileIntake=0.035; ProportionalDiscountDueToMilk=0.3; ProportionOfMaxWeightToSurvive=0.5; LactatingPotentialModifierConstantA=0.42; LactatingPotentialModifierConstantB=61; LactatingPotentialModifierConstantC=1.7; MaximumSizeOfIndividual=1.2; MortalityBase=0.03; MortalityCoefficient=2.5; MortalityIntercept=0.05; MortalityExponent=3; JuvenileMortalityCoefficient=3; JuvenileMortalityMaximum=0.2; JuvenileMortalityExponent=1.8; WoolCoefficient=0; CashmereCoefficient=0; MilkCurveSuckling=0.6; MilkCurveNonSuckling=0.11; MilkingDays=300; MilkPeakYield=20; MilkOffsetDay=4; MilkPeakDay=45; InterParturitionIntervalIntercept=10.847; InterParturitionIntervalCoefficient=-0.7994; GestationLength=9; MinimumAge1stMating=24; MinimumSize1stMating=0.5; MinimumDaysBirthToConception=61; TwinRate=0; CriticalCowWeight=0.5; ConceptionRateCoefficent=-14.247; ConceptionRateIntercept=5.182; ConceptionRateAsymptote=90; MaximumMaleMatingsPerDay=30; PrenatalMortality=0.079; MaximumConceptionUncontrolledBreeding=0.7; MethaneProductionIntercept=-34.8; MethaneProductionCoefficient=35.16
            RuminantInitialCohorts Initial cohorts
              RuminantTypeCohort WeanerF: Gender=Female; Age=36; Number=1; Weight=520; WeightSD=0; Suckling=false; Sire=false
      ActivitiesHolder Activities
        PastureActivityManage: same as PastureOnlySQL.CLEM.Activities.PastureActivityManage
        ActivityFolder Manage herd: OnPartialResourcesAvailableAction=ReportErrorAndStop
          RuminantActivityGrow Grow all ruminants: OnPartialResourcesAvailableAction=UseResourcesAvailable
          RuminantActivityMuster MusterToNativePasture: OnPartialResourcesAvailableAction=ReportErrorAndStop; ManagedPastureName=NativePasture; PerformAtStartOfSimulation=true; MoveSucklings=false
          RuminantActivityGrazeAll: OnPartialResourcesAvailableAction=ReportErrorAndStop; HoursGrazed=8
        SummariseRuminantHerd SummariseHerd
        ReportRuminantHerd ReportHerd
      Folder Reports
        Report GrazeFoodStoreLedger: same as PastureOnlySQL.CLEM.Reports.GrazeFoodStoreLedger
        Report LandLedger: same as PastureOnlySQL.CLEM.Reports.LandLedger
        ReportActivitiesPerformed
        ReportResourceBalances: EventNames=[Clock].CLEMEndOfTimeStep
          VariableNames:
            [Clock].Today
            Land
            GrazeFoodStore
        ReportResourceShortfalls
        Report HerdSummary: EventNames=[Activities].SummariseHerd.OnReportItemGenerated
          VariableNames:
            [Clock].Today
            [Activities].SummariseHerd.ReportDetails.Breed as Breed
            [Activities].SummariseHerd.ReportDetails.Herd as Herd
            [Activities].SummariseHerd.ReportDetails.Age as AgeGroup
            [Activities].SummariseHerd.ReportDetails.Sex as Sex
            [Activities].SummariseHerd.ReportDetails.Number as Num
            [Activities].SummariseHerd.ReportDetails.AverageWeight as AvgWt
            [Activities].SummariseHerd.ReportDetails.AverageWeightGain as AvgWtGn
            [Activities].SummariseHerd.ReportDetails.AverageIntake as AvgIntake
            [Activities].SummariseHerd.ReportDetails.AdultEquivalents as AE
            [Activities].SummariseHerd.ReportDetails.NumberPregnant as NoPregnant
            [Activities].SummariseHerd.ReportDetails.NumberOfBirths as Births
        Report HerdReport: EventNames=[Activities].ReportHerd.OnReportItemGenerated
          VariableNames:
            [Clock].Today
            [Activities].ReportHerd.ReportDetails.Individual.ID as UID
            [Activities].ReportHerd.ReportDetails.Individual.Weight as Weight
        Report HerdLedger: EventNames=[Resources].Ruminants.TransactionOccurred
          VariableNames:
            [Clock].Today
            [Resources].Ruminants.LastTransaction.ExtraInformation.ID as UId
            [Resources].Ruminants.LastTransaction.ExtraInformation.Breed as Breed
            [Resources].Ruminants.LastTransaction.ExtraInformation.HerdName as Herd
            [Resources].Ruminants.LastTransaction.ExtraInformation.GenderAsString as Sex
            [Resources].Ruminants.LastTransaction.ExtraInformation.Age as Age
            [Resources].Ruminants.LastTransaction.ExtraInformation.Weight as Weight
            [Resources].Ruminants.LastTransaction.ExtraInformation.SaleFlagAsString as Reason
            [Resources].Ruminants.LastTransaction.ExtraInformation.PopulationChangeDirection as Change
    FileSQLiteGRASP FileGRASP
      FileName=C:\Data\Source\Repos\ApsimX\Prototypes\CLEM\NABSA_GRASP_NthQld_WdThck_Base.db
  Simulation PastureTenAnimals
    Clock: StartDate=1995-01-01; EndDate=2009-12-31
    Summary summaryfile
    ZoneCLEM CLEM: Area=1; Slope=0; ClimateRegion=0; EcologicalIndicatorsCalculationMonth=12
      ResourcesHolder Resources
        Land
          LandType Field: LandArea=10000; SoilType=0
        GrazeFoodStore
          GrazeFoodStoreType NativePasture: NToDMDCoefficient=11.03; NToDMDIntercept=41.4; NToDMDCrudeProteinDenominator=0; GreenNitrogen=2; DecayNitrogen=0.35; MinimumNitrogen=0.4; DecayDMD=0.1; MinimumDMD=43; DetachRate=0.03; CarryoverDetachRate=0.12; IntakeTropicalQualityCoefficient=0.16; IntakeQualityCoefficient=1.7
        RuminantHerd Ruminants
          RuminantType Bos indicus: Breed=Bos indicus; EMaintEfficiencyCoefficient=0.35; EMaintEfficiencyIntercept=0.503; EGrowthEfficiencyCoefficient=0.79; EGrowthEfficiencyIntercept=0; ELactationEfficiencyCoefficient=0.35; ELactationEfficiencyIntercept=0.42; EMaintExponent=8.2E-05; EMaintIntercept=0.09; EMaintCoefficient=0.26; Kme=1; GrowthEnergyIntercept1=6.7; GrowthEnergyIntercept2=20.3; GrowthEfficiency=1.09; SRWFemale=500; SRWMaleMultiplier=1.2; SRWBirth=0.08; AgeGrowthRateCoefficient=0.0115; SRWGrowthScalar=0.32; IntakeCoefficient=0.024; IntakeIntercept=1.7; ProteinCoefficient=120; ProteinDegradability=0.9; BaseAnimalEquivalent=450; GreenDietMax=98; GreenDietCoefficient=0.15; GreenDietZero=4; IntakeTropicalQuality=0.16; IntakeCoefficientQuality=1.7; IntakeCoefficientBiomass=0.006; StrictFeedingLimits=true; MilkIntakeCoefficient=0.1206; MilkIntakeIntercept=3.8146; MilkIntakeMaximum=20; MilkLWTFodderSubstitutionProportion=0.2; MaxJuvenileIntake=0.035; ProportionalDiscountDueToMilk=0.3; ProportionOfMaxWeightToSurvive=0.5; LactatingPotentialModifierConstantA=0.42; LactatingPotentialModifierConstantB=61; LactatingPotentialModifierConstantC=1.7; MaximumSizeOfIndividual=1.2; MortalityBase=0.03; MortalityCoefficient=2.5; MortalityIntercept=0.05; MortalityExponent=3; JuvenileMortalityCoefficient=3; JuvenileMortalityMaximum=0.2; JuvenileMortalityExponent=1.8; WoolCoefficient=0; CashmereCoefficient=0; MilkCurveSuckling=0.6; MilkCurveNonSuckling=0.11; MilkingDays=300; MilkPeakYield=20; MilkOffsetDay=4; MilkPeakDay=45; InterParturitionIntervalIntercept=10.847; InterParturitionIntervalCoefficient=-0.7994; GestationLength=9; MinimumAge1stMating=24; MinimumSize1stMating=0.5; MinimumDaysBirthToConception=61; TwinRate=0; CriticalCowWeight=0.5; ConceptionRateCoefficent=-14.247; ConceptionRateIntercept=5.182; ConceptionRateAsymptote=90; MaximumMaleMatingsPerDay=30; PrenatalMortality=0.079; MaximumConceptionUncontrolledBreeding=0.7; MethaneProductionIntercept=-34.8; MethaneProductionCoefficient=35.16
            RuminantInitialCohorts Initial cohorts
              RuminantTypeCohort WeanerF: Gender=Female; Age=8; Number=3000; Weight=180; WeightSD=0; Suckling=false; Sire=false
      ActivitiesHolder Activities
        PastureActivityManage: OnPartialResourcesAvailableAction=ReportErrorAndStop; LandTypeNameToUse=Field; FeedTypeName=NativePasture; StartingAmount=3000; StartingStockingRate=0; AreaRequested=10000
          Relationship LandConditionIndex: StartingValue=2; Minimum=1; Maximum=11; XValues=[0, 20, 30, 100]; YValues=[-0.625, -0.125, 0, 0.75]
          Relationship GrassBasalArea: StartingValue=2; Minimum=1; Maximum=5; XValues=[0, 20, 30, 100]; YValues=[-0.95, -0.15, 0, 1.05]
        ActivityFolder Manage herd: OnPartialResourcesAvailableAction=ReportErrorAndStop
          RuminantActivityGrow Grow all ruminants: OnPartialResourcesAvailableAction=UseResourcesAvailable
          RuminantActivityMuster MusterToNativePasture: OnPartialResourcesAvailableAction=ReportErrorAndStop; ManagedPastureName=NativePasture; PerformAtStartOfSimulation=true; MoveSucklings=false
          RuminantActivityGrazeAll: OnPartialResourcesAvailableAction=UseResourcesAvailable; HoursGrazed=8
        SummariseRuminantHerd SummariseHerd
        ReportRuminantHerd ReportHerd
      Folder Reports
        Report GrazeFoodStoreLedger: same as PastureOnlySQL.CLEM.Reports.GrazeFoodStoreLedger
        Report LandLedger: same as PastureOnlySQL.CLEM.Reports.LandLedger
        ReportActivitiesPerformed
        ReportResourceBalances: EventNames=[Clock].CLEMEndOfTimeStep
          VariableNames:
            [Clock].Today
            Land
            GrazeFoodStore
            Ruminants
        ReportResourceShortfalls
        Report HerdSummary: same as PastureOneAnimal.CLEM.Reports.HerdSummary
        Report HerdReport: EventNames=[Activities].ReportHerd.OnReportItemGenerated
          VariableNames:
            [Clock].Today
            [Activities].ReportHerd.ReportDetails.Individual.ID as UID
            [Activities].ReportHerd.ReportDetails.Individual.Weight as Weight
        Report HerdLedger: same as PastureOneAnimal.CLEM.Reports.HerdLedger
        Report ResourceShortfallLedger: EventNames=[Activities].ResourceShortfallOccurred
          VariableNames:
            [Clock].Today as Date
            [Activities].LastShortfallResourceRequest.ResourceTypeName as Resource
            [Activities].LastShortfallResourceRequest.ActivityModel.Name as Activity
            [Activities].LastShortfallResourceRequest.Reason as Reason
            [Activities].LastShortfallResourceRequest.Required as Required
            [Activities].LastShortfallResourceRequest.Available as Available
    FileSQLiteGRASP FileGRASP
      FileName=C:\Data\Source\Repos\ApsimX\Prototypes\CLEM\NABSA_GRASP_NthQld_WdThck_Base.db
  Simulation PastureTwoHerds
    Clock: StartDate=1995-01-01; EndDate=2009-12-31
    Summary summaryfile
    ZoneCLEM CLEM: Area=1; Slope=0; ClimateRegion=0; EcologicalIndicatorsCalculationMonth=12
      ResourcesHolder Resources
        Land
          LandType Field: LandArea=100; SoilType=0
        GrazeFoodStore: same as PastureTenAnimals.CLEM.Resources.GrazeFoodStore
        RuminantHerd Ruminants
          RuminantType Bos indicus: Breed=Bos indicus; EMaintEfficiencyCoefficient=0.35; EMaintEfficiencyIntercept=0.503; EGrowthEfficiencyCoefficient=0.79; EGrowthEfficiencyIntercept=0; ELactationEfficiencyCoefficient=0.35; ELactationEfficiencyIntercept=0.42; EMaintExponent=8.2E-05; EMaintIntercept=0.09; EMaintCoefficient=0.26; Kme=1; GrowthEnergyIntercept1=6.7; GrowthEnergyIntercept2=20.3; GrowthEfficiency=1.09; SRWFemale=500; SRWMaleMultiplier=1.2; SRWBirth=0.08; AgeGrowthRateCoefficient=0.0115; SRWGrowthScalar=0.32; IntakeCoefficient=0.024; IntakeIntercept=1.7; ProteinCoefficient=120; ProteinDegradability=0.9; BaseAnimalEquivalent=450; GreenDietMax=98; GreenDietCoefficient=0.15; GreenDietZero=4; IntakeTropicalQuality=0.16; IntakeCoefficientQuality=1.7; IntakeCoefficientBiomass=0.006; StrictFeedingLimits=true; MilkIntakeCoefficient=0.1206; MilkIntakeIntercept=3.8146; MilkIntakeMaximum=20; MilkLWTFodderSubstitutionProportion=0.2; MaxJuvenileIntake=0.035; ProportionalDiscountDueToMilk=0.3; ProportionOfMaxWeightToSurvive=0.5; LactatingPotentialModifierConstantA=0.42; LactatingPotentialModifierConstantB=61; LactatingPotentialModifierConstantC=1.7; MaximumSizeOfIndividual=1.2; MortalityBase=0.03; MortalityCoefficient=2.5; MortalityIntercept=0.05; MortalityExponent=3; JuvenileMortalityCoefficient=3; JuvenileMortalityMaximum=0.2; JuvenileMortalityExponent=1.8; WoolCoefficient=0; CashmereCoefficient=0; MilkCurveSuckling=0.6; MilkCurveNonSuckling=0.11; MilkingDays=300; MilkPeakYield=20; MilkOffsetDay=4; MilkPeakDay=45; InterParturitionIntervalIntercept=10.847; InterParturitionIntervalCoefficient=-0.7994; GestationLength=9; MinimumAge1stMating=24; MinimumSize1stMating=0.5; MinimumDaysBirthToConception=61; TwinRate=0; CriticalCowWeight=0.5; ConceptionRateCoefficent=-14.247; ConceptionRateIntercept=5.182; ConceptionRateAsymptote=90; MaximumMaleMatingsPerDay=30; PrenatalMortality=0.079; MaximumConceptionUncontrolledBreeding=0.7; MethaneProductionIntercept=-34.8; MethaneProductionCoefficient=35.16
            RuminantInitialCohorts Initial cohorts
              RuminantTypeCohort WeanerF: Gender=Female; Age=8; Number=10; Weight=180; WeightSD=0; Suckling=false; Sire=false
          RuminantType Bos indicus1: Breed=Bos indicus; EMaintEfficiencyCoefficient=0.35; EMaintEfficiencyIntercept=0.503; EGrowthEfficiencyCoefficient=0.79; EGrowthEfficiencyIntercept=0; ELactationEfficiencyCoefficient=0.35; ELactationEfficiencyIntercept=0.42; EMaintExponent=8.2E-05; EMaintIntercept=0.09; EMaintCoefficient=0.26; Kme=1; GrowthEnergyIntercept1=6.7; GrowthEnergyIntercept2=20.3; GrowthEfficiency=1.09; SRWFemale=500; SRWMaleMultiplier=1.2; SRWBirth=0.08; AgeGrowthRateCoefficient=0.0115; SRWGrowthScalar=0.32; IntakeCoefficient=0.024; IntakeIntercept=1.7; ProteinCoefficient=120; ProteinDegradability=0.9; BaseAnimalEquivalent=450; GreenDietMax=98; GreenDietCoefficient=0.15; GreenDietZero=4; IntakeTropicalQuality=0.16; IntakeCoefficientQuality=1.7; IntakeCoefficientBiomass=0.006; StrictFeedingLimits=true; MilkIntakeCoefficient=0.1206; MilkIntakeIntercept=3.8146; MilkIntakeMaximum=20; MilkLWTFodderSubstitutionProportion=0.2; MaxJuvenileIntake=0.035; ProportionalDiscountDueToMilk=0.3; ProportionOfMaxWeightToSurvive=0.5; LactatingPotentialModifierConstantA=0.42; LactatingPotentialModifierConstantB=61; LactatingPotentialModifierConstantC=1.7; MaximumSizeOfIndividual=1.2; MortalityBase=0.03; MortalityCoefficient=2.5; MortalityIntercept=0.05; MortalityExponent=3; JuvenileMortalityCoefficient=3; JuvenileMortalityMaximum=0.2; JuvenileMortalityExponent=1.8; WoolCoefficient=0; CashmereCoefficient=0; MilkCurveSuckling=0.6; MilkCurveNonSuckling=0.11; MilkingDays=300; MilkPeakYield=20; MilkOffsetDay=4; MilkPeakDay=45; InterParturitionIntervalIntercept=10.847; InterParturitionIntervalCoefficient=-0.7994; GestationLength=9; MinimumAge1stMating=24; MinimumSize1stMating=0.5; MinimumDaysBirthToConception=61; TwinRate=0; CriticalCowWeight=0.5; ConceptionRateCoefficent=-14.247; ConceptionRateIntercept=5.182; ConceptionRateAsymptote=90; MaximumMaleMatingsPerDay=30; PrenatalMortality=0.079; MaximumConceptionUncontrolledBreeding=0.7; MethaneProductionIntercept=-34.8; MethaneProductionCoefficient=35.16
            RuminantInitialCohorts Initial cohorts
              RuminantTypeCohort WeanerF: Gender=Female; Age=8; Number=1; Weight=180; WeightSD=0; Suckling=false; Sire=false
      ActivitiesHolder Activities: same as PastureOneAnimal.CLEM.Activities
      Folder Reports: same as PastureOneAnimal.CLEM.Reports
    FileSQLiteGRASP FileGRASP
      FileName=C:\Data\Source\Repos\ApsimX\Prototypes\CLEM\NABSA_GRASP_NthQld_WdThck_Base.db
  Simulation PastureNABSAHerd
    Clock: StartDate=1995-07-01; EndDate=2010-12-31
    Summary summaryfile
    ZoneCLEM CLEM: Area=1; Slope=0; RandomSeed=0; ClimateRegion=0; EcologicalIndicatorsCalculationMonth=12
      ResourcesHolder Resources
        Land
          LandType Field: LandArea=30000; SoilType=0
        GrazeFoodStore: same as PastureTenAnimals.CLEM.Resources.GrazeFoodStore
        RuminantHerd Ruminants
          RuminantType Bos indicus: Breed=Bos indicus; EMaintEfficiencyCoefficient=0.35; EMaintEfficiencyIntercept=0.503; EGrowthEfficiencyCoefficient=0.79; EGrowthEfficiencyIntercept=0; ELactationEfficiencyCoefficient=0.35; ELactationEfficiencyIntercept=0.42; EMaintExponent=8.2E-05; EMaintIntercept=0.09; EMaintCoefficient=0.26; Kme=1; GrowthEnergyIntercept1=6.7; GrowthEnergyIntercept2=20.3; GrowthEfficiency=1.09; SRWFemale=500; SRWMaleMultiplier=1.2; SRWBirth=0.08; AgeGrowthRateCoefficient=0.0115; SRWGrowthScalar=0.32; IntakeCoefficient=0.024; IntakeIntercept=1.7; ProteinCoefficient=120; ProteinDegradability=0.9; BaseAnimalEquivalent=450; GreenDietMax=0.98; GreenDietCoefficient=0.15; GreenDietZero=0.04; IntakeTropicalQuality=0.16; IntakeCoefficientQuality=1.7; IntakeCoefficientBiomass=0.006; StrictFeedingLimits=true; MilkIntakeCoefficient=0.1206; MilkIntakeIntercept=3.8146; MilkIntakeMaximum=20; MilkLWTFodderSubstitutionProportion=0.2; MaxJuvenileIntake=0.035; ProportionalDiscountDueToMilk=0.3; ProportionOfMaxWeightToSurvive=0.5; LactatingPotentialModifierConstantA=0.42; LactatingPotentialModifierConstantB=61; LactatingPotentialModifierConstantC=1.7; MaximumSizeOfIndividual=1.2; MortalityBase=0.03; MortalityCoefficient=2.5; MortalityIntercept=0.05; MortalityExponent=3; JuvenileMortalityCoefficient=3; JuvenileMortalityMaximum=0.2; JuvenileMortalityExponent=1.8; WoolCoefficient=0; CashmereCoefficient=0; MilkCurveSuckling=0.6; MilkCurveNonSuckling=0.11; MilkingDays=300; MilkPeakYield=20; MilkOffsetDay=4; MilkPeakDay=45; InterParturitionIntervalIntercept=10.847; InterParturitionIntervalCoefficient=-0.7994; GestationLength=9; MinimumAge1stMating=24; MinimumSize1stMating=0.5; MinimumDaysBirthToConception=61; TwinRate=0; CriticalCowWeight=0.5; ConceptionRateCoefficent=-14.247; ConceptionRateIntercept=5.182; ConceptionRateAsymptote=90; MaximumMaleMatingsPerDay=30; PrenatalMortality=0.079; MaximumConceptionUncontrolledBreeding=0.7; MethaneProductionIntercept=-34.8; MethaneProductionCoefficient=35.16
            RuminantInitialCohorts Initial cohorts
              RuminantTypeCohort CalfF: Gender=Female; Age=5; Number=200; Weight=40; WeightSD=0; Suckling=true; Sire=false
              RuminantTypeCohort CalfM: Gender=Male; Age=5; Number=200; Weight=40; WeightSD=0; Suckling=true; Sire=false
              RuminantTypeCohort WeanerF: Gender=Female; Age=5; Number=500; Weight=180; WeightSD=0; Suckling=false; Sire=false
              RuminantTypeCohort WeanerM: Gender=Male; Age=5; Number=500; Weight=180; WeightSD=0; Suckling=false; Sire=false
              RuminantTypeCohort Female1_2: Gender=Female; Age=18; Number=200; Weight=270; WeightSD=0; Suckling=false; Sire=false
              RuminantTypeCohort Female2_3: Gender=Female; Age=30; Number=200; Weight=400; WeightSD=0; Suckling=false; Sire=false
              RuminantTypeCohort Female3_4: Gender=Female; Age=42; Number=200; Weight=450; WeightSD=0; Suckling=false; Sire=false
              RuminantTypeCohort Female4_5: Gender=Female; Age=54; Number=180; Weight=460; WeightSD=0; Suckling=false; Sire=false
              RuminantTypeCohort Female5_6: Gender=Female; Age=66; Number=180; Weight=470; WeightSD=0; Suckling=false; Sire=false
              RuminantTypeCohort Female6_7: Gender=Female; Age=78; Number=150; Weight=480; WeightSD=0; Suckling=false; Sire=false
              RuminantTypeCohort Female7_8: Gender=Female; Age=90; Number=150; Weight=480; WeightSD=0; Suckling=false; Sire=false
              RuminantTypeCohort Female8_9: Gender=Female; Age=102; Number=150; Weight=490; WeightSD=0; Suckling=false; Sire=false
              RuminantTypeCohort Female9_10: Gender=Female; Age=114; Number=150; Weight=500; WeightSD=0; Suckling=false; Sire=false
              RuminantTypeCohort Male1_2: Gender=Male; Age=18; Number=200; Weight=350; WeightSD=0; Suckling=false; Sire=false
              RuminantTypeCohort Male2_3: Gender=Male; Age=30; Number=200; Weight=520; WeightSD=0; Suckling=false; Sire=false
              RuminantTypeCohort Male3_4: Gender=Male; Age=42; Number=0; Weight=610; WeightSD=0; Suckling=false; Sire=false
              RuminantTypeCohort Breeding_sires: Gender=Male; Age=36; Number=60; Weight=720; WeightSD=0; Suckling=false; Sire=false
            AnimalPricing Prices: PricingStyle=perKg; BreedingSirePrice=0
              AnimalPriceEntry Female calves: Gender=Female; Age=0; PurchaseValue=2; SellValue=2
              AnimalPriceEntry Female weaners: Gender=Female; Age=9; PurchaseValue=1.8; SellValue=1.8
              AnimalPriceEntry Female 1-3y: Gender=Female; Age=12; PurchaseValue=1.6; SellValue=1.6
              AnimalPriceEntry Female 3+y: Gender=Female; Age=36; PurchaseValue=1.2; SellValue=1.2
              AnimalPriceEntry Male calves: Gender=Male; Age=0; PurchaseValue=2; SellValue=2
              AnimalPriceEntry Male weaners: Gender=Male; Age=9; PurchaseValue=1.8; SellValue=1.8
              AnimalPriceEntry Male 1-3y: Gender=Male; Age=12; PurchaseValue=1.6; SellValue=1.6
              AnimalPriceEntry Male 3+y: Gender=Male; Age=36; PurchaseValue=1.5; SellValue=1.5
      ActivitiesHolder Activities
        PastureActivityManage: OnPartialResourcesAvailableAction=ReportErrorAndStop; LandTypeNameToUse=Field; FeedTypeName=NativePasture; StartingAmount=3000; StartingStockingRate=0; AreaRequested=29700
          Relationship LandConditionIndex: StartingValue=2; Minimum=1; Maximum=11; XValues=[0, 20, 30, 100]; YValues=[-0.625, -0.125, 0, 0.75]
          Relationship GrassBasalArea: StartingValue=2; Minimum=1; Maximum=5; XValues=[0, 20, 30, 100]; YValues=[-0.95, -0.15, 0, 1.05]
        ActivityFolder Manage herd: same as PastureTenAnimals.CLEM.Activities.Manage herd
        SummariseRuminantHerd SummariseHerd
      Folder Reports
        ReportActivitiesPerformed
        ReportResourceBalances: EventNames=[Clock].CLEMEndOfTimeStep
          VariableNames:
            [Clock].Today
            Land
            GrazeFoodStore
        ReportResourceShortfalls
        Report LandLedger: same as PastureOnlySQL.CLEM.Reports.LandLedger
        Report GrazeFoodStoreLedger: same as PastureOnlySQL.CLEM.Reports.GrazeFoodStoreLedger
        Report HerdLedger: same as PastureOneAnimal.CLEM.Reports.HerdLedger
        Report HerdSummary: same as PastureOneAnimal.CLEM.Reports.HerdSummary
    FileSQLiteGRASP FileGRASP
      FileName=C:\Data\Source\Repos\ApsimX\Prototypes\CLEM\NABSA_GRASP_NthQld_WdThck_Base.db
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