Simulations: Version=28
  DataStore
  Simulation 1 person no labour shortfall
    Clock: StartDate=2000-01-01; EndDate=2009-12-31
    Summary summaryfile
    FileCrop: FileName=FileCrop_Naibonat.prn
    FileCrop FileCropResidue: FileName=FileCropResidue_Naibonat.prn
    ZoneCLEM CLEM: Area=1; Slope=0; RandomSeed=0; ClimateRegion=0; EcologicalIndicatorsCalculationMonth=12
      ResourcesHolder Resources
        Land
          LandType Field: LandArea=100; SoilType=3
        AnimalFoodStore
          AnimalFoodStoreType Maize: DMD=40; Nitrogen=2; StartingAmount=0
          AnimalFoodStoreType Maize stover: DMD=40; Nitrogen=2; StartingAmount=0
        Labour: AllowAging=true
          LabourType MaleAdult: InitialAge=42; Gender=Male; Individuals=1
          LabourAvailabilityList
            LabourAvailabilityItem Male: Value=15
              LabourFilter: Parameter=Gender; Operator=Equal; Value=Male
        Finance Finances
          FinanceType General account: OpeningBalance=10000000; EnforceWithdrawalLimit=false; WithdrawalLimit=0; InterestRateCharged=7.5; InterestRatePaid=2
      ActivitiesHolder Activities
        CropActivityManageCrop Manage maize: OnPartialResourcesAvailableAction=ReportErrorAndStop; LandItemNameToUse=Land.Field; AreaRequested=1; UseAreaAvailable=false
          CropActivityManageProduct Manage grain: OnPartialResourcesAvailableAction=ReportErrorAndStop; ModelNameFileCrop=FileCrop; CropName=Maize_sole_unfert; StoreItemName=AnimalFoodStore.Maize; ProportionKept=1; TreesPerHa=0; UnitsToHaConverter=0
            CropActivityTask Prepare field: OnPartialResourcesAvailableAction=UseResourcesAvailable
              ActivityTimerCropHarvest Plough 7 months before harvest: OffsetMonthHarvestStart=-7; OffsetMonthHarvestStop=-7
              LabourRequirement: LabourPerUnit=3; UnitSize=1; WholeUnitBlocks=false; UnitType=perHa; MinimumPerPerson=1; MaximumPerPerson=100; LabourShortfallAffectsActivity=false; ApplyToAll=false
                LabourFilterGroup
                  LabourFilter: Parameter=Gender; Operator=Equal; Value=Male
              CropActivityFee: OnPartialResourcesAvailableAction=UseResourcesAvailable; AccountName=Finances.General account; Amount=10
            CropActivityTask Sow seeds: OnPartialResourcesAvailableAction=UseResourcesAvailable
              ActivityTimerCropHarvest Sow 6 mths before harvest: OffsetMonthHarvestStart=-6; OffsetMonthHarvestStop=-6
              LabourRequirement: LabourPerUnit=2; UnitSize=1; WholeUnitBlocks=false; UnitType=perHa; MinimumPerPerson=1; MaximumPerPerson=100; LabourShortfallAffectsActivity=false; ApplyToAll=false
                LabourFilterGroup
                  LabourFilter: Parameter=Gender; Operator=Equal; Value=Male
              CropActivityFee: OnPartialResourcesAvailableAction=UseResourcesAvailable; AccountName=Finances.General account; Amount=10
            CropActivityTask Perform irrigation: OnPartialResourcesAvailableAction=UseResourcesAvailable
              ActivityTimerCropHarvest Irrigate plant to harvest: OffsetMonthHarvestStart=-5; OffsetMonthHarvestStop=-2
              LabourRequirement: same as 1 person no labour shortfall.CLEM.Activities.Manage maize.Manage grain.Prepare field.LabourRequirement
              CropActivityFee: OnPartialResourcesAvailableAction=UseResourcesAvailable; AccountName=Finances.General account; Amount=10
            CropActivityTask Harvest: OnPartialResourcesAvailableAction=UseResourcesAvailable
              ActivityTimerCropHarvest At harvest: OffsetMonthHarvestStart=0; OffsetMonthHarvestStop=0
              LabourRequirement: LabourPerUnit=4; UnitSize=1; WholeUnitBlocks=false; UnitType=perHa; MinimumPerPerson=1; MaximumPerPerson=100; LabourShortfallAffectsActivity=false; ApplyToAll=false
                LabourFilterGroup
                  LabourFilter: Parameter=Gender; Operator=Equal; Value=Male
      Folder Reports
        Report AnimalFoodStoreLedger: EventNames=[Resources].AnimalFoodStore.TransactionOccurred
          VariableNames:
            [Clock].Today as Date
            [Resources].AnimalFoodStore.LastTransaction.Credit as Credit
            [Resources].AnimalFoodStore.LastTransaction.Debit as Debit
            [Resources].AnimalFoodStore.LastTransaction.ResourceType as Resource
            [Resources].AnimalFoodStore.LastTransaction.Activity as Activity
            [Resources].AnimalFoodStore.LastTransaction.Reason as Reason
        Report LabourLedger: EventNames=[Resources].Labour.TransactionOccurred
          VariableNames:
            [Clock].Today as Date
            [Resources].Labour.LastTransaction.Credit as Credit
            [Resources].Labour.LastTransaction.Debit as Debit
            [Resources].Labour.LastTransaction.ResourceType as Resource
            [Resources].Labour.LastTransaction.Activity as Activity
            [Resources].Labour.LastTransaction.Reason as Reason
        ReportActivitiesPerformed
        ReportResourceBalances: EventNames=[Clock].CLEMEndOfTimeStep
          VariableNames:
            [Clock].Today
            Labour
            Finances
        ReportResourceShortfalls: EventNames=[Activities].ResourceShortfallOccurred
          VariableNames:
            [Clock].Today as Date
            [Activities].LastShortfallResourceRequest.ResourceTypeName as Resource
            [Activities].LastShortfallResourceRequest.ActivityModel.Name as Activity
            [Activities].LastShortfallResourceRequest.Reason as Reason
            [Activities].LastShortfallResourceRequest.Required as Required
            [Activities].LastShortfallResourceRequest.Available as Available
        Report FinancesLedger: EventNames=[Resources].Finances.TransactionOccurred
          VariableNames:
            [Clock].Today as Date
            [Resources].Finances.LastTransaction.Credit as Credit
            [Resources].Finances.LastTransaction.Debit as Debit
            [Resources].Finances.LastTransaction.ResourceType as Resource
            [Resources].Finances.LastTransaction.Activity as Activity
            [Resources].Finances.LastTransaction.Reason as Reason
  Simulation 2 people no labour shortfall
    Clock: StartDate=2000-01-01; EndDate=2009-12-31
    Summary summaryfile
    FileCrop: FileName=FileCrop_Naibonat.prn
    FileCrop FileCropResidue: FileName=FileCropResidue_Naibonat.prn
    ZoneCLEM CLEM: Area=1; Slope=0; RandomSeed=0; ClimateRegion=0; EcologicalIndicatorsCalculationMonth=12
      ResourcesHolder Resources
        Land
          LandType Field: LandArea=10; SoilType=3
        AnimalFoodStore
          AnimalFoodStoreType Maize: DMD=40; Nitrogen=2; StartingAmount=0
          AnimalFoodStoreType Maize stover: DMD=40; Nitrogen=2; StartingAmount=0
        Labour: AllowAging=true
          LabourType MaleAdult: InitialAge=42; Gender=Male; Individuals=1
          LabourType FemaleAdult: InitialAge=42; Gender=Female; Individuals=1
          LabourAvailabilityList
            LabourAvailabilityItem Male: Value=28
              LabourFilter: Parameter=Gender; Operator=Equal; Value=Male
            LabourAvailabilityItem Female: Value=25
              LabourFilter: Parameter=Gender; Operator=Equal; Value=Female
      ActivitiesHolder Activities
        CropActivityManageCrop Manage maize: OnPartialResourcesAvailableAction=UseResourcesAvailable; LandItemNameToUse=Land.Field; AreaRequested=10; UseAreaAvailable=false
          CropActivityManageProduct Manage grain: OnPartialResourcesAvailableAction=UseResourcesAvailable; ModelNameFileCrop=FileCrop; CropName=Maize_sole_unfert; StoreItemName=AnimalFoodStore.Maize; ProportionKept=1; TreesPerHa=0; UnitsToHaConverter=0
            CropActivityTask Prepare field: OnPartialResourcesAvailableAction=UseResourcesAvailable
              ActivityTimerCropHarvest Plough 7 months before harvest: OffsetMonthHarvestStart=-7; OffsetMonthHarvestStop=-7
              LabourRequirement: LabourPerUnit=1; UnitSize=1; WholeUnitBlocks=false; UnitType=perHa; MinimumPerPerson=1; MaximumPerPerson=100; LabourShortfallAffectsActivity=false; ApplyToAll=false
                LabourFilterGroup
            CropActivityTask Sow seeds: OnPartialResourcesAvailableAction=UseResourcesAvailable
              ActivityTimerCropHarvest Sow 6 mths before harvest: OffsetMonthHarvestStart=-6; OffsetMonthHarvestStop=-6
              LabourRequirement: LabourPerUnit=2; UnitSize=1; WholeUnitBlocks=false; UnitType=perHa; MinimumPerPerson=1; MaximumPerPerson=100; LabourShortfallAffectsActivity=false; ApplyToAll=false
                LabourFilterGroup
            CropActivityTask Perform irrigation: OnPartialResourcesAvailableAction=UseResourcesAvailable
              ActivityTimerCropHarvest Irrigate plant to harvest: OffsetMonthHarvestStart=-5; OffsetMonthHarvestStop=-2
              LabourRequirement: LabourPerUnit=4; UnitSize=1; WholeUnitBlocks=false; UnitType=perHa; MinimumPerPerson=1; MaximumPerPerson=100; LabourShortfallAffectsActivity=false; ApplyToAll=false
                LabourFilterGroup
            CropActivityTask Harvest: OnPartialResourcesAvailableAction=UseResourcesAvailable
              ActivityTimerCropHarvest At harvest: OffsetMonthHarvestStart=0; OffsetMonthHarvestStop=0
              LabourRequirement: LabourPerUnit=4; UnitSize=1; WholeUnitBlocks=false; UnitType=perHa; MinimumPerPerson=1; MaximumPerPerson=100; LabourShortfallAffectsActivity=false; ApplyToAll=false
                LabourFilterGroup
      Folder Reports
        Report AnimalFoodStoreLedger: same as 1 person no labour shortfall.CLEM.Reports.AnimalFoodStoreLedger
        Report LabourLedger: same as 1 person no labour shortfall.CLEM.Reports.LabourLedger
        ReportActivitiesPerformed
        ReportResourceBalances: EventNames=[Clock].CLEMEndOfTimeStep
          VariableNames:
            [Clock].Today
            Labour
            AnimalFoodStore
        ReportResourceShortfalls: same as 1 person no labour shortfall.CLEM.Reports.ReportResourceShortfalls
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