Simulations: Version=15
  DataStore
  Simulation SimpleManureCollection
    Clock: StartDate=1995-01-01; EndDate=2009-12-31
    Summary summaryfile
    ZoneCLEM CLEM: Area=1; Slope=0; ClimateRegion=0; EcologicalIndicatorsCalculationInterval=1; EcologicalIndicatorsCalculationMonth=12
      ResourcesHolder Resources
        Finance Finances
          FinanceType General account: OpeningBalance=10000000; EnforceWithdrawalLimit=false; WithdrawalLimit=0; InterestRateCharged=7.5; InterestRatePaid=2
        AnimalFoodStore
          AnimalFoodStoreType RiceStraw: DryMatter=89.5; DMD=45; Nitrogen=0.75; StartingAmount=10000
            Transmutation Purchase: AmountPerUnitPurchase=10000
              TransmutationCost Money: ResourceName=Finances; ResourceTypeName=General account; CostPerUnit=100
        RuminantHerd Ruminants
          RuminantType Bos indicus: Breed=Bos indicus; EMaintEfficiencyCoefficient=0.35; EMaintEfficiencyIntercept=0.503; EGrowthEfficiencyCoefficient=0.79; EGrowthEfficiencyIntercept=0; ELactationEfficiencyCoefficient=0.35; ELactationEfficiencyIntercept=0.42; EMaintExponent=8.2E-05; EMaintIntercept=0.09; EMaintCoefficient=0.26; Kme=1; GrowthEnergyIntercept1=6.7; GrowthEnergyIntercept2=20.3; GrowthEfficiency=1.09; SRWFemale=500; SRWMaleMultiplier=1.2; SRWBirth=0.08; AgeGrowthRateCoefficient=0.0115; SRWGrowthScalar=0.32; IntakeCoefficient=0.024; IntakeIntercept=1.7; ProteinCoefficient=120; ProteinDegradability=0.9; BaseAnimalEquivalent=450; GreenDietMax=98; GreenDietCoefficient=0.15; GreenDietZero=4; IntakeTropicalQuality=0.16; IntakeCoefficientQuality=1.7; IntakeCoefficientBiomass=0.006; StrictFeedingLimits=true; MilkIntakeCoefficient=0.1206; MilkIntakeIntercept=3.8146; MilkIntakeMaximum=20; MilkLWTFodderSubstitutionProportion=0.2; MaxJuvenileIntake=0.035; ProportionalDiscountDueToMilk=0.3; ProportionOfMaxWeightToSurvive=0.5; LactatingPotentialModifierConstantA=0.42; LactatingPotentialModifierConstantB=61; LactatingPotentialModifierConstantC=1.7; MaximumSizeOfIndividual=1.2; MortalityBase=0.03; MortalityCoefficient=2.5; MortalityIntercept=0.05; MortalityExponent=3; JuvenileMortalityCoefficient=3; JuvenileMortalityMaximum=0.2; JuvenileMortalityExponent=1.8; WoolCoefficient=0; CashmereCoefficient=0; MilkCurveSuckling=0.6; MilkCurveNonSuckling=0.11; MilkingDays=300; MilkPeakYield=20; MilkOffsetDay=4; MilkPeakDay=45; InterParturitionIntervalIntercept=10.847; InterParturitionIntervalCoefficient=-0.7994; GestationLength=9; MinimumAge1stMating=24; MinimumSize1stMating=0.5; MinimumDaysBirthToConception=61; TwinRate=0; CriticalCowWeight=0.5; ConceptionRateCoefficent=[-12.634, -14.247, -11, -9.8353]; ConceptionRateIntercept=[7.073, 5.182, 8.6, 6.754]; ConceptionRateAsymptote=[90, 90, 90, 95]; MaximumMaleMatingsPerDay=30; PrenatalMortality=7.9; MaximumConceptionUncontrolledBreeding=0.7; MethaneProductionIntercept=-34.8; MethaneProductionCoefficient=35.16
            RuminantInitialCohorts Initial cohorts
              RuminantTypeCohort Heifers: Gender=Female; Age=0; Number=0; Weight=0; WeightSD=0; Suckling=false; Sire=false
        ProductStore Products
          ProductStoreTypeManure Manure: DecayRate=0.9; MoistureDecayRate=0.5; ProportionMoistureFresh=0.3; MaximumAge=12
      ActivitiesHolder Activities
        ActivityFolder Manage herd: OnPartialResourcesAvailableAction=ReportErrorAndStop
          RuminantActivityFeed Feed rice straw: OnPartialResourcesAvailableAction=UseResourcesAvailable; FeedTypeName=RiceStraw; ProportionTramplingWastage=0; FeedStyle=ProportionOfWeight
            RuminantFeedGroup Feed Bos indicus
              MonthlyValues=[0.02, 0.02, 0.02, 0.02, 0.02, 0.02, 0.02, 0.02, 0.02, 0.02, 0.02, 0.02]
          RuminantActivityGrow Grow all ruminants: OnPartialResourcesAvailableAction=ReportErrorAndStop
        ActivityFolder Manage manure: OnPartialResourcesAvailableAction=ReportErrorAndStop
          RuminantActivityCollectManureAll Collect all manure: OnPartialResourcesAvailableAction=ReportErrorAndStop
          ResourceActivitySell Sell manure: OnPartialResourcesAvailableAction=UseResourcesAvailable; AccountName=General account; ResourceGroupName=Products; ResourceTypeName=Manure; SellWholeUnitsOnly=true; AmountReserved=0; UnitSize=10; UnitPrice=1
      Folder Reports
        Report FinancesLedger: EventNames=[Resources].Finances.TransactionOccurred
          VariableNames:
            [Clock].Today as Date
            [Resources].Finances.LastTransaction.Credit as Credit
            [Resources].Finances.LastTransaction.Debit as Debit
            [Resources].Finances.LastTransaction.ResourceType as Resource
            [Resources].Finances.LastTransaction.Activity as Activity
            [Resources].Finances.LastTransaction.Reason as Reason
        Report ResourceShortfallLedger: EventNames=[Activities].ResourceShortfallOccurred
          VariableNames:
            [Clock].Today as Date
            [Activities].LastShortfallResourceRequest.ResourceTypeName as Resource
            [Activities].LastShortfallResourceRequest.ActivityModel.Name as Activity
            [Activities].LastShortfallResourceRequest.Reason as Reason
            [Activities].LastShortfallResourceRequest.Required as Required
            [Activities].LastShortfallResourceRequest.Available as Available
        Report ProductsLedger: EventNames=[Resources].Products.TransactionOccurred
          VariableNames:
            [Clock].Today as Date
            [Resources].Products.LastTransaction.Credit as Credit
            [Resources].Products.LastTransaction.Debit as Debit
            [Resources].Products.LastTransaction.ResourceType as Resource
            [Resources].Products.LastTransaction.Activity as Activity
            [Resources].Products.LastTransaction.Reason as Reason
  Simulation SimpleManureCollectionLabour
    Clock: StartDate=1995-01-01; EndDate=2009-12-31
    Summary summaryfile
    ZoneCLEM CLEM: Area=1; Slope=0; ClimateRegion=0; EcologicalIndicatorsCalculationInterval=1; EcologicalIndicatorsCalculationMonth=12
      ResourcesHolder Resources
        Finance Finances
          FinanceType General account: OpeningBalance=10000000; EnforceWithdrawalLimit=false; WithdrawalLimit=0; InterestRateCharged=7.5; InterestRatePaid=2
        Labour: AllowAging=true
          LabourType Joe B: InitialAge=42; Gender=Male; Individuals=1
            MaxLabourSupply=[1.5, 1.5, 1.5, 1.5, 1.5, 1.5, 1.5, 1.5, 1.5, 1.5, 1.5, 1.5]
        AnimalFoodStore: same as SimpleManureCollection.CLEM.Resources.AnimalFoodStore
        RuminantHerd Ruminants
          RuminantType Bos indicus: Breed=Bos indicus; EMaintEfficiencyCoefficient=0.35; EMaintEfficiencyIntercept=0.503; EGrowthEfficiencyCoefficient=0.79; EGrowthEfficiencyIntercept=0; ELactationEfficiencyCoefficient=0.35; ELactationEfficiencyIntercept=0.42; EMaintExponent=8.2E-05; EMaintIntercept=0.09; EMaintCoefficient=0.26; Kme=1; GrowthEnergyIntercept1=6.7; GrowthEnergyIntercept2=20.3; GrowthEfficiency=1.09; SRWFemale=500; SRWMaleMultiplier=1.2; SRWBirth=0.08; AgeGrowthRateCoefficient=0.0115; SRWGrowthScalar=0.32; IntakeCoefficient=0.024; IntakeIntercept=1.7; ProteinCoefficient=120; ProteinDegradability=0.9; BaseAnimalEquivalent=450; GreenDietMax=98; GreenDietCoefficient=0.15; GreenDietZero=4; IntakeTropicalQuality=0.16; IntakeCoefficientQuality=1.7; IntakeCoefficientBiomass=0.006; StrictFeedingLimits=true; MilkIntakeCoefficient=0.1206; MilkIntakeIntercept=3.8146; MilkIntakeMaximum=20; MilkLWTFodderSubstitutionProportion=0.2; MaxJuvenileIntake=0.035; ProportionalDiscountDueToMilk=0.3; ProportionOfMaxWeightToSurvive=0.5; LactatingPotentialModifierConstantA=0.42; LactatingPotentialModifierConstantB=61; LactatingPotentialModifierConstantC=1.7; MaximumSizeOfIndividual=1.2; MortalityBase=0.03; MortalityCoefficient=2.5; MortalityIntercept=0.05; MortalityExponent=3; JuvenileMortalityCoefficient=3; JuvenileMortalityMaximum=0.2; JuvenileMortalityExponent=1.8; WoolCoefficient=0; CashmereCoefficient=0; MilkCurveSuckling=0.6; MilkCurveNonSuckling=0.11; MilkingDays=300; MilkPeakYield=20; MilkOffsetDay=4; MilkPeakDay=45; InterParturitionIntervalIntercept=10.847; InterParturitionIntervalCoefficient=-0.7994; GestationLength=9; MinimumAge1stMating=24; MinimumSize1stMating=0.5; MinimumDaysBirthToConception=61; TwinRate=0; CriticalCowWeight=0.5; ConceptionRateCoefficent=[-12.634, -14.247, -11, -9.8353]; ConceptionRateIntercept=[7.073, 5.182, 8.6, 6.754]; ConceptionRateAsymptote=[90, 90, 90, 95]; MaximumMaleMatingsPerDay=30; PrenatalMortality=7.9; MaximumConceptionUncontrolledBreeding=0.7; MethaneProductionIntercept=-34.8; MethaneProductionCoefficient=35.16
            RuminantInitialCohorts Initial cohorts
              RuminantTypeCohort Heifers: Gender=Female; Age=12; Number=10; Weight=250; WeightSD=0; Suckling=false; Sire=false
        ProductStore Products
          ProductStoreTypeManure Manure: DecayRate=0.9; MoistureDecayRate=0.5; ProportionMoistureFresh=0.3; MaximumAge=12
      ActivitiesHolder Activities
        ActivityFolder Manage herd: same as SimpleManureCollection.CLEM.Activities.Manage herd
        ActivityFolder Manage manure: OnPartialResourcesAvailableAction=ReportErrorAndStop
          RuminantActivityCollectManureAll Collect all manure: OnPartialResourcesAvailableAction=UseResourcesAvailable
            LabourFilterGroupSpecified Define labour: LabourPerUnit=1; UnitSize=500; UnitType=perKg
              LabourFilter Filter[Name=Joe B]: Parameter=Name; Operator=Equal; Value=Joe B
          ResourceActivitySell Sell manure: OnPartialResourcesAvailableAction=UseResourcesAvailable; AccountName=General account; ResourceGroupName=Products; ResourceTypeName=Manure; SellWholeUnitsOnly=true; AmountReserved=0; UnitSize=10; UnitPrice=1
            LabourFilterGroupUnit Define labour: LabourPerUnit=0.5; UnitType=Fixed
              LabourFilter Filter[Name=Joe B]: Parameter=Name; Operator=Equal; Value=Joe B
      Folder Reports
        Report FinancesLedger: same as SimpleManureCollection.CLEM.Reports.FinancesLedger
        Report ResourceShortfallLedger: same as SimpleManureCollection.CLEM.Reports.ResourceShortfallLedger
        Report ProductsLedger: same as SimpleManureCollection.CLEM.Reports.ProductsLedger
        Report LabourLedger: EventNames=[Resources].Labour.TransactionOccurred
          VariableNames:
            [Clock].Today as Date
            [Resources].Labour.LastTransaction.Credit as Credit
            [Resources].Labour.LastTransaction.Debit as Debit
            [Resources].Labour.LastTransaction.ResourceType as Resource
            [Resources].Labour.LastTransaction.Activity as Activity
            [Resources].Labour.LastTransaction.Reason as Reason
