Simulations: Version=19
  DataStore
  Simulation GrowPasture
    Clock: StartDate=1995-01-01; EndDate=2009-12-31
    Summary summaryfile
    FileGRASP: FileName=Nth Qld_Base_xx_WoodyThck_NABSAdb.csv
    ZoneCLEM CLEM: Area=1; Slope=0; ClimateRegion=0; EcologicalIndicatorsCalculationInterval=1; EcologicalIndicatorsCalculationMonth=12
      ResourcesHolder Resources
        Land
          LandType Red soil: LandArea=100; SoilType=0
        GrazeFoodStore
          GrazeFoodStoreType Pasture
            zero: NToDMDCoefficient, NToDMDIntercept, NToDMDCrudeProteinDenominator, GreenNitrogen, DecayNitrogen, MinimumNitrogen, DecayDMD, MinimumDMD, DetachRate, CarryoverDetachRate, IntakeTropicalQualityCoefficient, IntakeQualityCoefficient
      ActivitiesHolder Activities
        PastureActivityManage Manage pasture: OnPartialResourcesAvailableAction=ReportErrorAndStop; LandTypeNameToUse=Red soil; FeedTypeName=Pasture; StartingAmount=1000; StartingStockingRate=1; AreaRequested=100
          Relationship LandConditionIndex: StartingValue=2; Minimum=0; Maximum=11; XValues=[0, 15, 35, 100]; YValues=[-1.5, -0.3, 0.3, 1.5]
          Relationship GrassBasalArea: StartingValue=3; Minimum=0; Maximum=3; XValues=[0, 15, 35, 100]; YValues=[-0.75, -0.15, 0.15, 0.75]
      Folder Reports
        Report LandLedger: EventNames=[Resources].Land.TransactionOccurred
          VariableNames:
            [Clock].Today as Date
            [Resources].Land.LastTransaction.Credit as Credit
            [Resources].Land.LastTransaction.Debit as Debit
            [Resources].Land.LastTransaction.ResourceType as Resource
            [Resources].Land.LastTransaction.Activity as Activity
            [Resources].Land.LastTransaction.Reason as Reason
        Report GrazeFoodStoreLedger: EventNames=[Resources].GrazeFoodStore.TransactionOccurred
          VariableNames:
            [Clock].Today as Date
            [Resources].GrazeFoodStore.LastTransaction.Credit as Credit
            [Resources].GrazeFoodStore.LastTransaction.Debit as Debit
            [Resources].GrazeFoodStore.LastTransaction.ResourceType as Resource
            [Resources].GrazeFoodStore.LastTransaction.Activity as Activity
            [Resources].GrazeFoodStore.LastTransaction.Reason as Reason
        Report ResourceShortfallLedger: EventNames=[Activities].ResourceShortfallOccurred
          VariableNames:
            [Clock].Today as Date
            [Activities].LastShortfallResourceRequest.ResourceTypeName as Resource
            [Activities].LastShortfallResourceRequest.ActivityModel.Name as Activity
            [Activities].LastShortfallResourceRequest.Reason as Reason
            [Activities].LastShortfallResourceRequest.Required as Required
            [Activities].LastShortfallResourceRequest.Available as Available
