Simulations: Version=46
  DataStore
  Simulation IndividualGrowth
    Clock: StartDate=1995-01-01; EndDate=2009-12-31
    Summary summaryfile
    ZoneCLEM CLEM: Area=1; Slope=0; RandomSeed=0; ClimateRegion=0; EcologicalIndicatorsCalculationMonth=12
      ResourcesHolder Resources
        Finance Finances
          FinanceType General account: OpeningBalance=10000000; EnforceWithdrawalLimit=false; WithdrawalLimit=0; InterestRateCharged=7.5; InterestRatePaid=2
        AnimalFoodStore
          AnimalFoodStoreType RiceStraw: DMD=45; Nitrogen=0.75; StartingAmount=10000
            Transmutation Purchase: AmountPerUnitPurchase=10000
              TransmutationCost Money: ResourceName=Finances; ResourceTypeName=General account; CostPerUnit=100
        RuminantHerd Ruminants
          RuminantType Bos indicus: Breed=Bos indicus; EMaintEfficiencyCoefficient=0.35; EMaintEfficiencyIntercept=0.503; EGrowthEfficiencyCoefficient=0.79; EGrowthEfficiencyIntercept=0; ELactationEfficiencyCoefficient=0.35; ELactationEfficiencyIntercept=0.42; EMaintExponent=8.2E-05; EMaintIntercept=0.09; EMaintCoefficient=0.26; Kme=1; GrowthEnergyIntercept1=6.7; GrowthEnergyIntercept2=20.3; GrowthEfficiency=1.09; SRWFemale=500; SRWMaleMultiplier=1.2; SRWBirth=0.08; AgeGrowthRateCoefficient=0.0115; SRWGrowthScalar=0.32; IntakeCoefficient=0.024; IntakeIntercept=1.7; ProteinCoefficient=120; ProteinDegradability=0.9; BaseAnimalEquivalent=450; GreenDietMax=0.98; GreenDietCoefficient=0.15; GreenDietZero=0.04; IntakeTropicalQuality=0.16; IntakeCoefficientQuality=1.7; IntakeCoefficientBiomass=0.006; StrictFeedingLimits=true; MilkIntakeCoefficient=0.1206; MilkIntakeIntercept=3.8146; MilkIntakeMaximum=20; MilkLWTFodderSubstitutionProportion=0.2; MaxJuvenileIntake=0.035; ProportionalDiscountDueToMilk=0.3; ProportionOfMaxWeightToSurvive=0.5; LactatingPotentialModifierConstantA=0.42; LactatingPotentialModifierConstantB=61; LactatingPotentialModifierConstantC=1.7; MaximumSizeOfIndividual=1.2; MortalityBase=0.03; MortalityCoefficient=2.5; MortalityIntercept=0.05; MortalityExponent=3; JuvenileMortalityCoefficient=3; JuvenileMortalityMaximum=0.2; JuvenileMortalityExponent=1.8; WoolCoefficient=0; CashmereCoefficient=0; MilkCurveSuckling=0.6; MilkCurveNonSuckling=0.11; MilkingDays=300; MilkPeakYield=20; MilkOffsetDay=4; MilkPeakDay=45; InterParturitionIntervalIntercept=10.847; InterParturitionIntervalCoefficient=-0.7994; GestationLength=9; MinimumAge1stMating=24; MinimumSize1stMating=0.5; MinimumDaysBirthToConception=61; TwinRate=0; CriticalCowWeight=0.5; ConceptionRateCoefficent=-14.247; ConceptionRateIntercept=5.182; ConceptionRateAsymptote=90; MaximumMaleMatingsPerDay=30; PrenatalMortality=0.079; MaximumConceptionUncontrolledBreeding=0.7; MethaneProductionCoefficient=35.16
            RuminantInitialCohorts Initial cohorts
              RuminantTypeCohort WeanerF: Gender=Female; Age=8; Number=1; Weight=180; WeightSD=0; Suckling=false; Sire=false
      ActivitiesHolder Activities
        ActivityFolder Manage herd: OnPartialResourcesAvailableAction=ReportErrorAndStop
          RuminantActivityFeed Feed rice straw: OnPartialResourcesAvailableAction=UseResourcesAvailable; FeedTypeName=AnimalFoodStore.RiceStraw; ProportionTramplingWastage=0; FeedStyle=ProportionOfWeight
            RuminantFeedGroup Feed all: Value=0.5
          RuminantActivityGrow Grow all ruminants: OnPartialResourcesAvailableAction=UseResourcesAvailable
        SummariseRuminantHerd SummariseHerd
        ReportRuminantHerd ReportHerd
      Folder Reports
        Report HerdSummary: EventNames=[Activities].SummariseHerd.OnReportItemGenerated
          VariableNames:
            [Clock].Today
            [Activities].SummariseHerd.ReportDetails.Breed as Breed
            [Activities].SummariseHerd.ReportDetails.Herd as Herd
            [Activities].SummariseHerd.ReportDetails.Age as AgeGroup
            [Activities].SummariseHerd.ReportDetails.Sex as Sex
            [Activities].SummariseHerd.ReportDetails.Number as Num
            [Activities].SummariseHerd.ReportDetails.AverageWeight as AvgWt
            [Activities].SummariseHerd.ReportDetails.AverageWeightGain as AvgWtGn
            [Activities].SummariseHerd.ReportDetails.AverageIntake as AvgIntake
            [Activities].SummariseHerd.ReportDetails.AdultEquivalents as AE
            [Activities].SummariseHerd.ReportDetails.NumberPregnant as NoPregnant
            [Activities].SummariseHerd.ReportDetails.NumberOfBirths as Births
        Report HerdReport: EventNames=[Activities].ReportHerd.OnReportItemGenerated
          VariableNames:
            [Clock].Today
            [Activities].ReportHerd.ReportDetails.Individual.ID as UID
            [Activities].ReportHerd.ReportDetails.Individual.Weight
        Report FinancesLedger: EventNames=[Resources].Finances.TransactionOccurred
          VariableNames:
            [Clock].Today as Date
            [Resources].Finances.LastTransaction.Credit as Credit
            [Resources].Finances.LastTransaction.Debit as Debit
            [Resources].Finances.LastTransaction.ResourceType as Resource
            [Resources].Finances.LastTransaction.Activity as Activity
            [Resources].Finances.LastTransaction.Reason as Reason
        Report AnimalFoodLedger: EventNames=[Resources].AnimalFoodStore.TransactionOccurred
          VariableNames:
            [Clock].Today as Date
            [Resources].AnimalFoodStore.LastTransaction.Credit as Credit
            [Resources].AnimalFoodStore.LastTransaction.Debit as Debit
            [Resources].AnimalFoodStore.LastTransaction.ResourceType as Resource
            [Resources].AnimalFoodStore.LastTransaction.Activity as Activity
            [Resources].AnimalFoodStore.LastTransaction.Reason as Reason
        Report ResourceShortfallLedger: EventNames=[Activities].ResourceShortfallOccurred
          VariableNames:
            [Clock].Today as Date
            [Activities].LastShortfallResourceRequest.ResourceTypeName as Resource
            [Activities].LastShortfallResourceRequest.ActivityModel.Name as Activity
            [Activities].LastShortfallResourceRequest.Reason as Reason
            [Activities].LastShortfallResourceRequest.Required as Required
            [Activities].LastShortfallResourceRequest.Available as Available
        Report HerdLedger: EventNames=[Resources].Ruminants.TransactionOccurred
          VariableNames:
            [Clock].Today
            [Resources].Ruminants.LastTransaction.ExtraInformation.ID as UId
            [Resources].Ruminants.LastTransaction.ExtraInformation.Breed as Breed
            [Resources].Ruminants.LastTransaction.ExtraInformation.HerdName as Herd
            [Resources].Ruminants.LastTransaction.ExtraInformation.GenderAsString as Sex
            [Resources].Ruminants.LastTransaction.ExtraInformation.Age as Age
            [Resources].Ruminants.LastTransaction.ExtraInformation.Weight as Weight
            [Resources].Ruminants.LastTransaction.ExtraInformation.SaleFlagAsString as Reason
            [Resources].Ruminants.LastTransaction.ExtraInformation.PopulationChangeDirection as Change
        ReportResourceBalances: EventNames=[Clock].CLEMEndOfTimeStep
          VariableNames:
            [Clock].Today
            AnimalFoodStore
        ReportActivitiesPerformed
  Simulation SucklingMother
    Clock: StartDate=1995-01-01; EndDate=2009-12-31
    Summary summaryfile
    ZoneCLEM CLEM: Area=1; Slope=0; RandomSeed=0; ClimateRegion=0; EcologicalIndicatorsCalculationMonth=9
      ResourcesHolder Resources
        Finance Finances
          FinanceType General account: OpeningBalance=10000000; EnforceWithdrawalLimit=false; WithdrawalLimit=0; InterestRateCharged=7.5; InterestRatePaid=2
        AnimalFoodStore
          AnimalFoodStoreType RiceStraw: DMD=62; Nitrogen=1.2; StartingAmount=10000
            Transmutation Purchase: AmountPerUnitPurchase=10000
              TransmutationCost Money: ResourceName=Finances; ResourceTypeName=General account; CostPerUnit=100
        RuminantHerd Ruminants
          RuminantType Bos indicus: Breed=Bos indicus; EMaintEfficiencyCoefficient=0.35; EMaintEfficiencyIntercept=0.503; EGrowthEfficiencyCoefficient=0.79; EGrowthEfficiencyIntercept=0; ELactationEfficiencyCoefficient=0.35; ELactationEfficiencyIntercept=0.42; EMaintExponent=8.2E-05; EMaintIntercept=0.09; EMaintCoefficient=0.26; Kme=1; GrowthEnergyIntercept1=6.7; GrowthEnergyIntercept2=20.3; GrowthEfficiency=1.09; SRWFemale=500; SRWMaleMultiplier=1.2; SRWBirth=0.08; AgeGrowthRateCoefficient=0.0115; SRWGrowthScalar=0.32; IntakeCoefficient=0.024; IntakeIntercept=1.7; ProteinCoefficient=120; ProteinDegradability=0.9; BaseAnimalEquivalent=450; GreenDietMax=0.98; GreenDietCoefficient=0.15; GreenDietZero=0.04; IntakeTropicalQuality=0.16; IntakeCoefficientQuality=1.7; IntakeCoefficientBiomass=0.006; StrictFeedingLimits=true; MilkIntakeCoefficient=0.1206; MilkIntakeIntercept=3.8146; MilkIntakeMaximum=20; MilkLWTFodderSubstitutionProportion=0.2; MaxJuvenileIntake=0.035; ProportionalDiscountDueToMilk=0.3; ProportionOfMaxWeightToSurvive=0.5; LactatingPotentialModifierConstantA=0.42; LactatingPotentialModifierConstantB=61; LactatingPotentialModifierConstantC=1.7; MaximumSizeOfIndividual=1.2; MortalityBase=0.03; MortalityCoefficient=2.5; MortalityIntercept=0.05; MortalityExponent=3; JuvenileMortalityCoefficient=3; JuvenileMortalityMaximum=0.2; JuvenileMortalityExponent=1.8; WoolCoefficient=0; CashmereCoefficient=0; MilkCurveSuckling=0.6; MilkCurveNonSuckling=0.11; MilkingDays=300; MilkPeakYield=20; MilkOffsetDay=4; MilkPeakDay=45; InterParturitionIntervalIntercept=10.847; InterParturitionIntervalCoefficient=-0.7994; GestationLength=9; MinimumAge1stMating=24; MinimumSize1stMating=0.5; MinimumDaysBirthToConception=61; TwinRate=0; CriticalCowWeight=0.5; ConceptionRateCoefficent=-14.247; ConceptionRateIntercept=5.182; ConceptionRateAsymptote=90; MaximumMaleMatingsPerDay=30; PrenatalMortality=0.079; MaximumConceptionUncontrolledBreeding=0.7; MethaneProductionCoefficient=35.16
            RuminantInitialCohorts Initial cohorts
              RuminantTypeCohort Calf: Gender=Female; Age=0; Number=1; Weight=40; WeightSD=0; Suckling=true; Sire=false
              RuminantTypeCohort Cow: Gender=Female; Age=36; Number=1; Weight=450; WeightSD=0; Suckling=false; Sire=false
      ActivitiesHolder Activities
        ActivityFolder Manage herd: OnPartialResourcesAvailableAction=ReportErrorAndStop
          RuminantActivityFeed Feed rice straw: OnPartialResourcesAvailableAction=UseResourcesAvailable; FeedTypeName=AnimalFoodStore.RiceStraw; ProportionTramplingWastage=0; FeedStyle=ProportionOfWeight
            RuminantFeedGroup Feed Bos indicus: Value=0.02
          RuminantActivityGrow Grow all ruminants: OnPartialResourcesAvailableAction=ReportErrorAndStop
        SummariseRuminantHerd SummariseHerd
        ReportRuminantHerd ReportHerd
      Folder Reports
        Report HerdSummary: EventNames=[Activities].SummariseHerd.OnReportItemGenerated
          VariableNames:
            [Clock].Today.Month as Month
            [Clock].Today.Year as Year
            [Activities].SummariseHerd.ReportDetails.TimeStep as MonthCount
            [Activities].SummariseHerd.ReportDetails.Breed as Breed
            [Activities].SummariseHerd.ReportDetails.Herd as Herd
            [Activities].SummariseHerd.ReportDetails.Age as AgeGroup
            [Activities].SummariseHerd.ReportDetails.Sex as Sex
            [Activities].SummariseHerd.ReportDetails.Number as Num
            [Activities].SummariseHerd.ReportDetails.AverageWeight as AvgWt
            [Activities].SummariseHerd.ReportDetails.AverageWeightGain as AvgWtGn
            [Activities].SummariseHerd.ReportDetails.AverageIntake as AvgIntake
            [Activities].SummariseHerd.ReportDetails.AdultEquivalents as AE
            [Activities].SummariseHerd.ReportDetails.NumberPregnant as NoPregnant
            [Activities].SummariseHerd.ReportDetails.Numberlactating as NoLactating
            [Activities].SummariseHerd.ReportDetails.NumberOfBirths as Births
        Report FinancesLedger: same as IndividualGrowth.CLEM.Reports.FinancesLedger
        Report AnimalFoodLedger: same as IndividualGrowth.CLEM.Reports.AnimalFoodLedger
        Report ResourceShortfallLedger: same as IndividualGrowth.CLEM.Reports.ResourceShortfallLedger
        Report HerdLedger: same as IndividualGrowth.CLEM.Reports.HerdLedger
        Report HerdReport: EventNames=[Activities].ReportHerd.OnReportItemGenerated
          VariableNames:
            [Clock].Today
            [Activities].ReportHerd.ReportDetails.Individual.ID as UID
            [Activities].ReportHerd.ReportDetails.Individual.Weight as Weight
        ReportResourceBalances: EventNames=[Clock].CLEMEndOfTimeStep
          VariableNames:
            [Clock].Today
            AnimalFoodStore
        ReportActivitiesPerformed
  Simulation BreedingUncontrolled
    Clock: StartDate=1995-01-01; EndDate=2009-12-31
    Summary summaryfile
    ZoneCLEM CLEM: Area=1; Slope=0; RandomSeed=0; ClimateRegion=0; EcologicalIndicatorsCalculationMonth=9
      ResourcesHolder Resources
        Finance Finances
          FinanceType General account: OpeningBalance=10000000; EnforceWithdrawalLimit=false; WithdrawalLimit=0; InterestRateCharged=7.5; InterestRatePaid=2
        AnimalFoodStore
          AnimalFoodStoreType RiceStraw: DMD=49; Nitrogen=1.3; StartingAmount=10000
            Transmutation Purchase: AmountPerUnitPurchase=10000
              TransmutationCost Money: ResourceName=Finances; ResourceTypeName=General account; CostPerUnit=100
        RuminantHerd Ruminants
          RuminantType Bos indicus: Breed=Bos indicus; EMaintEfficiencyCoefficient=0.35; EMaintEfficiencyIntercept=0.503; EGrowthEfficiencyCoefficient=0.79; EGrowthEfficiencyIntercept=0; ELactationEfficiencyCoefficient=0.35; ELactationEfficiencyIntercept=0.42; EMaintExponent=8.2E-05; EMaintIntercept=0.09; EMaintCoefficient=0.26; Kme=1; GrowthEnergyIntercept1=6.7; GrowthEnergyIntercept2=20.3; GrowthEfficiency=1.09; SRWFemale=500; SRWMaleMultiplier=1.2; SRWBirth=0.08; AgeGrowthRateCoefficient=0.0115; SRWGrowthScalar=0.32; IntakeCoefficient=0.024; IntakeIntercept=1.7; ProteinCoefficient=120; ProteinDegradability=0.9; BaseAnimalEquivalent=450; GreenDietMax=0.98; GreenDietCoefficient=0.15; GreenDietZero=0.04; IntakeTropicalQuality=0.16; IntakeCoefficientQuality=1.7; IntakeCoefficientBiomass=0.006; StrictFeedingLimits=true; MilkIntakeCoefficient=0.1206; MilkIntakeIntercept=3.8146; MilkIntakeMaximum=20; MilkLWTFodderSubstitutionProportion=0.2; MaxJuvenileIntake=0.035; ProportionalDiscountDueToMilk=0.3; ProportionOfMaxWeightToSurvive=0.5; LactatingPotentialModifierConstantA=0.42; LactatingPotentialModifierConstantB=61; LactatingPotentialModifierConstantC=1.7; MaximumSizeOfIndividual=1.2; MortalityBase=0.03; MortalityCoefficient=2.5; MortalityIntercept=0.05; MortalityExponent=3; JuvenileMortalityCoefficient=3; JuvenileMortalityMaximum=0.2; JuvenileMortalityExponent=1.8; WoolCoefficient=0; CashmereCoefficient=0; MilkCurveSuckling=0.6; MilkCurveNonSuckling=0.11; MilkingDays=300; MilkPeakYield=20; MilkOffsetDay=4; MilkPeakDay=45; InterParturitionIntervalIntercept=10.847; InterParturitionIntervalCoefficient=-0.7994; GestationLength=9; MinimumAge1stMating=24; MinimumSize1stMating=0.5; MinimumDaysBirthToConception=61; TwinRate=0; CriticalCowWeight=0.5; ConceptionRateCoefficent=-14.247; ConceptionRateIntercept=5.182; ConceptionRateAsymptote=90; MaximumMaleMatingsPerDay=30; PrenatalMortality=0.079; MaximumConceptionUncontrolledBreeding=0.7; MethaneProductionCoefficient=35.16
            RuminantInitialCohorts Initial cohorts
              RuminantTypeCohort Female: Gender=Female; Age=16; Number=1; Weight=270; WeightSD=0; Suckling=false; Sire=false
              RuminantTypeCohort Male: Gender=Male; Age=24; Number=1; Weight=520; WeightSD=0; Suckling=false; Sire=true
      ActivitiesHolder Activities
        ActivityFolder Manage herd: OnPartialResourcesAvailableAction=ReportErrorAndStop
          RuminantActivityFeed Feed rice straw: OnPartialResourcesAvailableAction=UseResourcesAvailable; FeedTypeName=AnimalFoodStore.RiceStraw; ProportionTramplingWastage=0; FeedStyle=ProportionOfPotentialIntake
            RuminantFeedGroup Feed all: Value=1
          RuminantActivityGrow Grow all: OnPartialResourcesAvailableAction=ReportErrorAndStop
          RuminantActivityBreed Breed: OnPartialResourcesAvailableAction=ReportErrorAndStop; MaximumConceptionRateUncontrolled=0.8; UseAI=false
        SummariseRuminantHerd SummariseHerd
        ReportRuminantHerd ReportHerd
          RuminantFilterGroup FirstFemaleOnly
            RuminantFilter Filter[ID=1]: Parameter=ID; Operator=Equal; Value=1
      Folder Reports
        Report HerdSummary: EventNames=[Activities].SummariseHerd.OnReportItemGenerated
          VariableNames:
            [Clock].Today
            [Activities].SummariseHerd.ReportDetails.Breed as Breed
            [Activities].SummariseHerd.ReportDetails.Herd as Herd
            [Activities].SummariseHerd.ReportDetails.Age as AgeGroup
            [Activities].SummariseHerd.ReportDetails.Sex as Sex
            [Activities].SummariseHerd.ReportDetails.Number as Num
            [Activities].SummariseHerd.ReportDetails.AverageWeight as AvgWt
            [Activities].SummariseHerd.ReportDetails.AverageWeightGain as AvgWtGn
            [Activities].SummariseHerd.ReportDetails.AverageIntake as AvgIntake
            [Activities].SummariseHerd.ReportDetails.AdultEquivalents as AE
            [Activities].SummariseHerd.ReportDetails.NumberPregnant as NoPregnant
            [Activities].SummariseHerd.ReportDetails.NumberLactating as NoLactating
            [Activities].SummariseHerd.ReportDetails.NumberOfBirths as Births
        Report FinancesLedger: same as IndividualGrowth.CLEM.Reports.FinancesLedger
        Report AnimalFoodLedger: same as IndividualGrowth.CLEM.Reports.AnimalFoodLedger
        Report ResourceShortfallLedger: same as IndividualGrowth.CLEM.Reports.ResourceShortfallLedger
        Report HerdLedger: same as IndividualGrowth.CLEM.Reports.HerdLedger
        Report HerdReport: EventNames=[Activities].ReportHerd.OnReportItemGenerated
          VariableNames:
            [Clock].Today
            [Activities].ReportHerd.ReportDetails.Individual.ID as IndID
            [Activities].ReportHerd.ReportDetails.Individual.GenderAsString as Gender
            [Activities].ReportHerd.ReportDetails.Individual.Weight as Weight
            [Activities].ReportHerd.ReportDetails.Individual.PreviousWeight as PWeight
            [Activities].ReportHerd.ReportDetails.Female.NumberOfBirths as Births
            [Activities].ReportHerd.ReportDetails.Female.AgeAtLastBirth as AgeBirth
        ReportResourceBalances: EventNames=[Clock].CLEMEndOfTimeStep
          VariableNames:
            [Clock].Today
            AnimalFoodStore
        ReportActivitiesPerformed
  Simulation BreedingControlled
    Clock: StartDate=1995-01-01; EndDate=2009-12-31
    Summary summaryfile
    ZoneCLEM CLEM: Area=1; Slope=0; RandomSeed=0; ClimateRegion=0; EcologicalIndicatorsCalculationMonth=9
      ResourcesHolder Resources
        Finance Finances
          FinanceType General account: OpeningBalance=10000000; EnforceWithdrawalLimit=false; WithdrawalLimit=0; InterestRateCharged=7.5; InterestRatePaid=2
        AnimalFoodStore: same as BreedingUncontrolled.CLEM.Resources.AnimalFoodStore
        RuminantHerd Ruminants
          RuminantType Bos indicus: Breed=Bos indicus; EMaintEfficiencyCoefficient=0.35; EMaintEfficiencyIntercept=0.503; EGrowthEfficiencyCoefficient=0.79; EGrowthEfficiencyIntercept=0; ELactationEfficiencyCoefficient=0.35; ELactationEfficiencyIntercept=0.42; EMaintExponent=8.2E-05; EMaintIntercept=0.09; EMaintCoefficient=0.26; Kme=1; GrowthEnergyIntercept1=6.7; GrowthEnergyIntercept2=20.3; GrowthEfficiency=1.09; SRWFemale=500; SRWMaleMultiplier=1.2; SRWBirth=0.08; AgeGrowthRateCoefficient=0.0115; SRWGrowthScalar=0.32; IntakeCoefficient=0.024; IntakeIntercept=1.7; ProteinCoefficient=120; ProteinDegradability=0.9; BaseAnimalEquivalent=450; GreenDietMax=0.98; GreenDietCoefficient=0.15; GreenDietZero=0.04; IntakeTropicalQuality=0.16; IntakeCoefficientQuality=1.7; IntakeCoefficientBiomass=0.006; StrictFeedingLimits=true; MilkIntakeCoefficient=0.1206; MilkIntakeIntercept=3.8146; MilkIntakeMaximum=20; MilkLWTFodderSubstitutionProportion=0.2; MaxJuvenileIntake=0.035; ProportionalDiscountDueToMilk=0.3; ProportionOfMaxWeightToSurvive=0.5; LactatingPotentialModifierConstantA=0.42; LactatingPotentialModifierConstantB=61; LactatingPotentialModifierConstantC=1.7; MaximumSizeOfIndividual=1.2; MortalityBase=0.03; MortalityCoefficient=2.5; MortalityIntercept=0.05; MortalityExponent=3; JuvenileMortalityCoefficient=3; JuvenileMortalityMaximum=0.2; JuvenileMortalityExponent=1.8; WoolCoefficient=0; CashmereCoefficient=0; MilkCurveSuckling=0.6; MilkCurveNonSuckling=0.11; MilkingDays=300; MilkPeakYield=20; MilkOffsetDay=4; MilkPeakDay=45; InterParturitionIntervalIntercept=10.847; InterParturitionIntervalCoefficient=-0.7994; GestationLength=9; MinimumAge1stMating=24; MinimumSize1stMating=0.5; MinimumDaysBirthToConception=61; TwinRate=0; CriticalCowWeight=0.5; ConceptionRateCoefficent=-14.247; ConceptionRateIntercept=5.182; ConceptionRateAsymptote=90; MaximumMaleMatingsPerDay=30; PrenatalMortality=0.079; MaximumConceptionUncontrolledBreeding=0.7; MethaneProductionCoefficient=35.16
            RuminantInitialCohorts Initial cohorts
              RuminantTypeCohort Female: Gender=Female; Age=12; Number=1; Weight=270; WeightSD=0; Suckling=false; Sire=false
              RuminantTypeCohort Male: Gender=Male; Age=24; Number=1; Weight=520; WeightSD=0; Suckling=false; Sire=true
      ActivitiesHolder Activities
        ActivityFolder Manage herd: OnPartialResourcesAvailableAction=ReportErrorAndStop
          RuminantActivityFeed Feed rice straw: OnPartialResourcesAvailableAction=UseResourcesAvailable; FeedTypeName=AnimalFoodStore.RiceStraw; ProportionTramplingWastage=0; FeedStyle=ProportionOfPotentialIntake
            RuminantFeedGroup Feed all: Value=1
          RuminantActivityGrow Grow all: OnPartialResourcesAvailableAction=ReportErrorAndStop
          RuminantActivityBreed Breed: OnPartialResourcesAvailableAction=ReportErrorAndStop; MaximumConceptionRateUncontrolled=0.8; UseAI=true
            ActivityTimerInterval Perform every August: MonthDue=8
        SummariseRuminantHerd SummariseHerd
        ReportRuminantHerd ReportHerd
          RuminantFilterGroup Only female
            RuminantFilter Filter[Gender=Female]: Parameter=Gender; Operator=Equal; Value=Female
      Folder Reports
        Report HerdSummary: same as SucklingMother.CLEM.Reports.HerdSummary
        Report FinancesLedger: same as IndividualGrowth.CLEM.Reports.FinancesLedger
        Report AnimalFoodLedger: same as IndividualGrowth.CLEM.Reports.AnimalFoodLedger
        Report ResourceShortfallLedger: same as IndividualGrowth.CLEM.Reports.ResourceShortfallLedger
        Report HerdLedger: same as IndividualGrowth.CLEM.Reports.HerdLedger
        Report HerdReport: same as BreedingUncontrolled.CLEM.Reports.HerdReport
        Report ActivityLedger: EventNames=[Activities].ActivityPerformed
          VariableNames:
            [Clock].Today as Date
            [Activities].LastActivityPerformed.Name as Name
            [Activities].LastActivityPerformed.Status.ToString() as Status
        ReportResourceBalances: EventNames=[Clock].CLEMEndOfTimeStep
          VariableNames:
            [Clock].Today
            AnimalFoodStore
        ReportActivitiesPerformed
  Simulation BreedingWithHerdCosts
    Clock: StartDate=2000-01-01; EndDate=2009-12-31
    Summary summaryfile
    ZoneCLEM CLEM: Area=1; Slope=0; RandomSeed=0; ClimateRegion=0; EcologicalIndicatorsCalculationMonth=9
      ResourcesHolder Resources: same as BreedingControlled.CLEM.Resources
      ActivitiesHolder Activities
        ActivityFolder Manage herd: OnPartialResourcesAvailableAction=ReportErrorAndStop
          RuminantActivityFeed Feed rice straw: OnPartialResourcesAvailableAction=UseResourcesAvailable; FeedTypeName=AnimalFoodStore.RiceStraw; ProportionTramplingWastage=0; FeedStyle=ProportionOfPotentialIntake
            RuminantFeedGroup Feed all: Value=1
          RuminantActivityGrow Grow all ruminants: OnPartialResourcesAvailableAction=ReportErrorAndStop
          RuminantActivityBreed Breed: OnPartialResourcesAvailableAction=ReportErrorAndStop; MaximumConceptionRateUncontrolled=0.8; UseAI=true
            ActivityTimerInterval Perform every August: MonthDue=8
          RuminantActivityHerdCost Vet costs: OnPartialResourcesAvailableAction=ReportErrorAndStop; Amount=2000; PaymentStyle=Fixed; AccountName=General account
            ActivityTimerInterval Pay in december: MonthDue=12
          RuminantActivityHerdCost Vaccines and drenches: OnPartialResourcesAvailableAction=SkipActivity; Amount=1; AccountName=General account
            ActivityTimerMonthRange: StartMonth=6; EndMonth=8
          RuminantActivityHerdCost Dips and sprays: OnPartialResourcesAvailableAction=SkipActivity; Amount=5; PaymentStyle=perAE; AccountName=General account
            ActivityTimerInterval Every july: MonthDue=7
            RuminantFilterGroup Only females
              RuminantFilter Filter[Gender=Female]: Parameter=Gender; Operator=Equal; Value=Female
        SummariseRuminantHerd SummariseHerd
        ReportRuminantHerd ReportHerd
          RuminantFilterGroup Only female
            RuminantFilter Filter[Gender=Female]: Parameter=Gender; Operator=Equal; Value=Female
        ActivityFolder ChargeReceiveInterest: OnPartialResourcesAvailableAction=ReportErrorAndStop
          FinanceActivityCalculateInterest: OnPartialResourcesAvailableAction=UseResourcesAvailable
      Folder Reports
        Report HerdSummary: same as SucklingMother.CLEM.Reports.HerdSummary
        Report FinancesLedger: same as IndividualGrowth.CLEM.Reports.FinancesLedger
        Report AnimalFoodLedger: same as IndividualGrowth.CLEM.Reports.AnimalFoodLedger
        Report ResourceShortfallLedger: same as IndividualGrowth.CLEM.Reports.ResourceShortfallLedger
        Report HerdLedger: same as IndividualGrowth.CLEM.Reports.HerdLedger
        Report HerdReport: same as BreedingUncontrolled.CLEM.Reports.HerdReport
        Report ActivityLedger: EventNames=[Activities].ActivityPerformed
          VariableNames:
            [Clock].Today as Date
            [Activities].LastActivityPerformed.Name as Name
            [Activities].LastActivityPerformed.Status.ToString() as Status
        ReportResourceBalances: EventNames=[Clock].CLEMEndOfTimeStep
          VariableNames:
            [Clock].Today
            AnimalFoodStore
            Finances
        ReportActivitiesPerformed
  Simulation HerdWean
    Clock: StartDate=1995-01-01; EndDate=2009-12-31
    Summary summaryfile
    ZoneCLEM CLEM: Area=1; Slope=0; RandomSeed=0; ClimateRegion=0; EcologicalIndicatorsCalculationMonth=9
      ResourcesHolder Resources: same as BreedingControlled.CLEM.Resources
      ActivitiesHolder Activities
        ActivityFolder Manage herd: OnPartialResourcesAvailableAction=ReportErrorAndStop
          RuminantActivityFeed Feed rice straw: OnPartialResourcesAvailableAction=UseResourcesAvailable; FeedTypeName=AnimalFoodStore.RiceStraw; ProportionTramplingWastage=0; FeedStyle=ProportionOfPotentialIntake
            RuminantFeedGroup Feed all: Value=1
          RuminantActivityGrow Grow all ruminants: OnPartialResourcesAvailableAction=ReportErrorAndStop
          RuminantActivityBreed Breed: OnPartialResourcesAvailableAction=ReportErrorAndStop; MaximumConceptionRateUncontrolled=0.8; UseAI=true
            ActivityTimerInterval Perform every August: MonthDue=8
          RuminantActivityWean Wean: OnPartialResourcesAvailableAction=ReportErrorAndStop; WeaningAge=8; WeaningWeight=100
        SummariseRuminantHerd SummariseHerd
        ReportRuminantHerd ReportHerd
      Folder Reports: same as BreedingControlled.CLEM.Reports
  Simulation HerdManage
    Clock: StartDate=1995-01-01; EndDate=2009-12-31
    Summary summaryfile
    ZoneCLEM CLEM: Area=1; Slope=0; RandomSeed=0; ClimateRegion=0; EcologicalIndicatorsCalculationMonth=9
      ResourcesHolder Resources: same as BreedingControlled.CLEM.Resources
      ActivitiesHolder Activities
        ActivityFolder Manage herd: OnPartialResourcesAvailableAction=ReportErrorAndStop
          RuminantActivityFeed Feed rice straw: OnPartialResourcesAvailableAction=UseResourcesAvailable; FeedTypeName=AnimalFoodStore.RiceStraw; ProportionTramplingWastage=0; FeedStyle=ProportionOfPotentialIntake
            RuminantFeedGroup Feed Bos indicus: Value=1
          RuminantActivityGrow Grow all: OnPartialResourcesAvailableAction=ReportErrorAndStop
          RuminantActivityBreed Breed: OnPartialResourcesAvailableAction=ReportErrorAndStop; MaximumConceptionRateUncontrolled=0.8; UseAI=true
            ActivityTimerInterval Perform every August: MonthDue=8
          RuminantActivityWean Wean: OnPartialResourcesAvailableAction=UseResourcesAvailable; WeaningAge=8; WeaningWeight=100; GrazeFoodStoreName=Not specified - general yards
          RuminantActivityManage Manage numbers: OnPartialResourcesAvailableAction=ReportErrorAndStop; MaximumBreedersKept=10; MinimumBreedersKept=2; MaximumBreederAge=180; MaximumSiresKept=2; MaximumBullAge=20; AllowSireReplacement=false; MaximumSiresPerPurchase=5; MaleSellingAge=18; MaleSellingWeight=150; MinimumPastureBeforeRestock=1500; SellFemalesLikeMales=false; ContinuousMaleSales=false
        SummariseRuminantHerd SummariseHerd
        ReportRuminantHerd ReportHerd
      Folder Reports: same as BreedingControlled.CLEM.Reports
  Simulation HerdBuySell
    Clock: StartDate=1995-01-01; EndDate=2009-12-31
    Summary summaryfile
    ZoneCLEM CLEM: Area=1; Slope=0; RandomSeed=0; ClimateRegion=0; EcologicalIndicatorsCalculationMonth=9
      ResourcesHolder Resources
        Finance Finances
          FinanceType General account: OpeningBalance=10000000; EnforceWithdrawalLimit=false; WithdrawalLimit=0; InterestRateCharged=7.5; InterestRatePaid=2
        AnimalFoodStore: same as BreedingUncontrolled.CLEM.Resources.AnimalFoodStore
        RuminantHerd Ruminants
          RuminantType Bos indicus: Breed=Bos indicus; EMaintEfficiencyCoefficient=0.35; EMaintEfficiencyIntercept=0.503; EGrowthEfficiencyCoefficient=0.79; EGrowthEfficiencyIntercept=0; ELactationEfficiencyCoefficient=0.35; ELactationEfficiencyIntercept=0.42; EMaintExponent=8.2E-05; EMaintIntercept=0.09; EMaintCoefficient=0.26; Kme=1; GrowthEnergyIntercept1=6.7; GrowthEnergyIntercept2=20.3; GrowthEfficiency=1.09; SRWFemale=500; SRWMaleMultiplier=1.2; SRWBirth=0.08; AgeGrowthRateCoefficient=0.0115; SRWGrowthScalar=0.32; IntakeCoefficient=0.024; IntakeIntercept=1.7; ProteinCoefficient=120; ProteinDegradability=0.9; BaseAnimalEquivalent=450; GreenDietMax=0.98; GreenDietCoefficient=0.15; GreenDietZero=0.04; IntakeTropicalQuality=0.16; IntakeCoefficientQuality=1.7; IntakeCoefficientBiomass=0.006; StrictFeedingLimits=true; MilkIntakeCoefficient=0.1206; MilkIntakeIntercept=3.8146; MilkIntakeMaximum=20; MilkLWTFodderSubstitutionProportion=0.2; MaxJuvenileIntake=0.035; ProportionalDiscountDueToMilk=0.3; ProportionOfMaxWeightToSurvive=0.5; LactatingPotentialModifierConstantA=0.42; LactatingPotentialModifierConstantB=61; LactatingPotentialModifierConstantC=1.7; MaximumSizeOfIndividual=1.2; MortalityBase=0.03; MortalityCoefficient=2.5; MortalityIntercept=0.05; MortalityExponent=3; JuvenileMortalityCoefficient=3; JuvenileMortalityMaximum=0.2; JuvenileMortalityExponent=1.8; WoolCoefficient=0; CashmereCoefficient=0; MilkCurveSuckling=0.6; MilkCurveNonSuckling=0.11; MilkingDays=300; MilkPeakYield=20; MilkOffsetDay=4; MilkPeakDay=45; InterParturitionIntervalIntercept=10.847; InterParturitionIntervalCoefficient=-0.7994; GestationLength=9; MinimumAge1stMating=24; MinimumSize1stMating=0.5; MinimumDaysBirthToConception=61; TwinRate=0; CriticalCowWeight=0.5; ConceptionRateCoefficent=-14.247; ConceptionRateIntercept=5.182; ConceptionRateAsymptote=90; MaximumMaleMatingsPerDay=30; PrenatalMortality=0.079; MaximumConceptionUncontrolledBreeding=0.7; MethaneProductionCoefficient=35.16
            RuminantInitialCohorts Initial cohorts: same as BreedingControlled.CLEM.Resources.Ruminants.Bos indicus.Initial cohorts
            AnimalPricing Prices: PricingStyle=perHead; BreedingSirePrice=6000
              AnimalPriceGroup: PurchaseValue=250; SellValue=500
      ActivitiesHolder Activities
        ActivityFolder Manage herd: OnPartialResourcesAvailableAction=ReportErrorAndStop
          RuminantActivityFeed Feed rice straw: OnPartialResourcesAvailableAction=UseResourcesAvailable; FeedTypeName=AnimalFoodStore.RiceStraw; ProportionTramplingWastage=0; FeedStyle=ProportionOfPotentialIntake
            RuminantFeedGroup Feed Bos indicus: Value=1
          RuminantActivityGrow Grow all: OnPartialResourcesAvailableAction=ReportErrorAndStop
          RuminantActivityBreed Breed: OnPartialResourcesAvailableAction=ReportErrorAndStop; MaximumConceptionRateUncontrolled=0.8; UseAI=true
            ActivityTimerInterval Perform every August: MonthDue=8
          RuminantActivityWean Wean: OnPartialResourcesAvailableAction=ReportErrorAndStop; WeaningAge=8; WeaningWeight=100
            ActivityTimerInterval Apr and Oct: Interval=6; MonthDue=4
          ActivityFolder MusterToYards: OnPartialResourcesAvailableAction=ReportErrorAndStop
            ActivityTimerInterval every August: MonthDue=8
            RuminantActivityManage Manage numbers: OnPartialResourcesAvailableAction=ReportErrorAndStop; MaximumBreedersKept=10; MinimumBreedersKept=2; MaximumBreederAge=180; MaximumSiresKept=2; MaximumBullAge=96; AllowSireReplacement=false; MaximumSiresPerPurchase=5; MaleSellingAge=18; MaleSellingWeight=150; MinimumPastureBeforeRestock=1500; SellFemalesLikeMales=false; ContinuousMaleSales=false
            RuminantActivityBuySell Buy and sell: OnPartialResourcesAvailableAction=ReportErrorAndStop; BankAccountName=Finances.General account
        SummariseRuminantHerd SummariseHerd
        ReportRuminantHerd ReportHerd
      Folder Reports: same as BreedingWithHerdCosts.CLEM.Reports
  Simulation HerdBuySellTrucking
    Clock: StartDate=1995-01-01; EndDate=2009-12-31
    Summary summaryfile
    ZoneCLEM CLEM: Area=1; Slope=0; RandomSeed=0; ClimateRegion=0; EcologicalIndicatorsCalculationMonth=9
      ResourcesHolder Resources: same as HerdBuySell.CLEM.Resources
      ActivitiesHolder Activities
        ActivityFolder Manage herd: OnPartialResourcesAvailableAction=ReportErrorAndStop
          RuminantActivityFeed Feed rice straw: OnPartialResourcesAvailableAction=UseResourcesAvailable; FeedTypeName=AnimalFoodStore.RiceStraw; ProportionTramplingWastage=0; FeedStyle=ProportionOfPotentialIntake
            RuminantFeedGroup Feed Bos indicus: Value=1
          RuminantActivityGrow Grow all: OnPartialResourcesAvailableAction=ReportErrorAndStop
          RuminantActivityBreed Breed: OnPartialResourcesAvailableAction=ReportErrorAndStop; MaximumConceptionRateUncontrolled=0.8; UseAI=true
            ActivityTimerInterval Perform every August: MonthDue=8
          RuminantActivityWean Wean: OnPartialResourcesAvailableAction=ReportErrorAndStop; WeaningAge=8; WeaningWeight=100
            ActivityTimerInterval Apr and Oct: Interval=6; MonthDue=4
          ActivityFolder MusterToYards: OnPartialResourcesAvailableAction=ReportErrorAndStop
            ActivityTimerInterval every August: MonthDue=8
            RuminantActivityManage Manage numbers: same as HerdBuySell.CLEM.Activities.Manage herd.MusterToYards.Manage numbers
            RuminantActivityBuySell Buy and sell: OnPartialResourcesAvailableAction=ReportErrorAndStop; BankAccountName=Finances.General account
              TruckingSettings: DistanceToMarket=120; CostPerKmTrucking=5; Number450kgPerTruck=100; MinimumTrucksBeforeSelling=0; MinimumLoadBeforeSelling=0; TruckCO2Emissions=0; TruckMethaneEmissions=0; TruckNOxEmissions=0
        SummariseRuminantHerd SummariseHerd
        ReportRuminantHerd ReportHerd
      Folder Reports: same as BreedingWithHerdCosts.CLEM.Reports
  Simulation SellDryBreeders
    Clock: StartDate=1995-01-01; EndDate=2009-12-31
    Summary summaryfile
    ZoneCLEM CLEM: Area=1; Slope=0; RandomSeed=0; ClimateRegion=0; EcologicalIndicatorsCalculationMonth=9
      ResourcesHolder Resources: same as HerdBuySell.CLEM.Resources
      ActivitiesHolder Activities
        ActivityFolder Manage herd: OnPartialResourcesAvailableAction=ReportErrorAndStop
          RuminantActivityFeed Feed rice straw: OnPartialResourcesAvailableAction=UseResourcesAvailable; FeedTypeName=AnimalFoodStore.RiceStraw; ProportionTramplingWastage=0; FeedStyle=ProportionOfPotentialIntake
            RuminantFeedGroup Feed Bos indicus: Value=1
          RuminantActivityGrow Grow all: OnPartialResourcesAvailableAction=ReportErrorAndStop
          RuminantActivityBreed Breed: OnPartialResourcesAvailableAction=UseResourcesAvailable; MaximumConceptionRateUncontrolled=0.8; UseAI=true
            ActivityTimerInterval Perform every August: MonthDue=8
          RuminantActivityWean Wean: OnPartialResourcesAvailableAction=UseResourcesAvailable; WeaningAge=8; WeaningWeight=100
            ActivityTimerInterval Apr and Oct: Interval=6; MonthDue=4
          ActivityFolder MusterToYards: OnPartialResourcesAvailableAction=ReportErrorAndStop
            ActivityTimerInterval every August: MonthDue=8
            RuminantActivitySellDryBreeders Sell dry breeders: OnPartialResourcesAvailableAction=UseResourcesAvailable; MinimumConceptionBeforeSell=0.3; MonthsSinceBirth=36; ProportionToRemove=1
            RuminantActivityBuySell Buy and sell: OnPartialResourcesAvailableAction=UseResourcesAvailable; BankAccountName=Finances.General account
        SummariseRuminantHerd SummariseHerd
        ReportRuminantHerd ReportHerd
      Folder Reports: same as BreedingWithHerdCosts.CLEM.Reports
  Simulation HerdTrade
    Clock: StartDate=1995-01-01; EndDate=2009-12-31
    Summary summaryfile
    ZoneCLEM CLEM: Area=1; Slope=0; RandomSeed=0; ClimateRegion=0; EcologicalIndicatorsCalculationMonth=9
      ResourcesHolder Resources
        Finance Finances
          FinanceType General account: OpeningBalance=10000000; EnforceWithdrawalLimit=false; WithdrawalLimit=0; InterestRateCharged=7.5; InterestRatePaid=2
        AnimalFoodStore
          AnimalFoodStoreType RiceStraw: DMD=49; Nitrogen=1.3; StartingAmount=10001
            Transmutation Purchase: AmountPerUnitPurchase=10000
              TransmutationCost Money: ResourceName=Finances; ResourceTypeName=General account; CostPerUnit=100
        RuminantHerd Ruminants
          RuminantType Bos indicus: Breed=Bos indicus2; EMaintEfficiencyCoefficient=0.35; EMaintEfficiencyIntercept=0.503; EGrowthEfficiencyCoefficient=0.79; EGrowthEfficiencyIntercept=0; ELactationEfficiencyCoefficient=0.35; ELactationEfficiencyIntercept=0.42; EMaintExponent=8.2E-05; EMaintIntercept=0.09; EMaintCoefficient=0.26; Kme=1; GrowthEnergyIntercept1=6.7; GrowthEnergyIntercept2=20.3; GrowthEfficiency=1.09; SRWFemale=500; SRWMaleMultiplier=1.2; SRWBirth=0.08; AgeGrowthRateCoefficient=0.0115; SRWGrowthScalar=0.32; IntakeCoefficient=0.024; IntakeIntercept=1.7; ProteinCoefficient=120; ProteinDegradability=0.9; BaseAnimalEquivalent=450; GreenDietMax=0.98; GreenDietCoefficient=0.15; GreenDietZero=0.04; IntakeTropicalQuality=0.16; IntakeCoefficientQuality=1.7; IntakeCoefficientBiomass=0.006; StrictFeedingLimits=true; MilkIntakeCoefficient=0.1206; MilkIntakeIntercept=3.8146; MilkIntakeMaximum=20; MilkLWTFodderSubstitutionProportion=0.2; MaxJuvenileIntake=0.035; ProportionalDiscountDueToMilk=0.3; ProportionOfMaxWeightToSurvive=0.5; LactatingPotentialModifierConstantA=0.42; LactatingPotentialModifierConstantB=61; LactatingPotentialModifierConstantC=1.7; MaximumSizeOfIndividual=1.2; MortalityBase=0.03; MortalityCoefficient=2.5; MortalityIntercept=0.05; MortalityExponent=3; JuvenileMortalityCoefficient=3; JuvenileMortalityMaximum=0.2; JuvenileMortalityExponent=1.8; WoolCoefficient=0; CashmereCoefficient=0; MilkCurveSuckling=0.6; MilkCurveNonSuckling=0.11; MilkingDays=300; MilkPeakYield=20; MilkOffsetDay=4; MilkPeakDay=45; InterParturitionIntervalIntercept=10.847; InterParturitionIntervalCoefficient=-0.7994; GestationLength=9; MinimumAge1stMating=24; MinimumSize1stMating=0.5; MinimumDaysBirthToConception=61; TwinRate=0; CriticalCowWeight=0.5; ConceptionRateCoefficent=-14.247; ConceptionRateIntercept=5.182; ConceptionRateAsymptote=90; MaximumMaleMatingsPerDay=30; PrenatalMortality=0.079; MaximumConceptionUncontrolledBreeding=0.7; MethaneProductionCoefficient=35.16
            AnimalPricing Prices: PricingStyle=perHead; BreedingSirePrice=6000
              AnimalPriceGroup: PurchaseValue=250; SellValue=500
      ActivitiesHolder Activities
        ActivityFolder Manage herd: OnPartialResourcesAvailableAction=ReportErrorAndStop
          RuminantActivityFeed Feed rice straw: OnPartialResourcesAvailableAction=UseResourcesAvailable; FeedTypeName=AnimalFoodStore.RiceStraw; ProportionTramplingWastage=0; FeedStyle=ProportionOfPotentialIntake
            RuminantFeedGroup Feed Bos indicus: Value=1
          RuminantActivityGrow Grow all: OnPartialResourcesAvailableAction=ReportErrorAndStop
          ActivityFolder MusterToYards: OnPartialResourcesAvailableAction=ReportErrorAndStop
            ActivityTimerInterval every August: MonthDue=8
            RuminantActivityTrade Manage trades: OnPartialResourcesAvailableAction=ReportErrorAndStop; MinMonthsKept=12; TradeWeight=520
              RuminantTypeCohort Purchase steers: Gender=Male; Age=12; Number=10; Weight=350; WeightSD=0; Suckling=false; Sire=false
            RuminantActivityBuySell Buy and sell: OnPartialResourcesAvailableAction=ReportErrorAndStop; BankAccountName=Finances.General account
        SummariseRuminantHerd SummariseHerd
        ReportRuminantHerd ReportHerd
      Folder Reports: same as BreedingWithHerdCosts.CLEM.Reports
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