Simulations: Version=51
  Memo TitlePage
    # The APSIM Canola Model
  DataStore
    ExcelInput: FileName=Observed.xlsx; SheetNames=[OBSPhenology, OBSLeafAppearance]
    PredictedObserved: PredictedTableName=HarvestReport; ObservedTableName=OBSPhenology; FieldNameUsedForMatch=Canola.Phenology.CurrentStageName
    PredictedObserved PredictedObservedLeafAppearance: PredictedTableName=DailyReport; ObservedTableName=OBSLeafAppearance; FieldNameUsedForMatch=Clock.Today
  Replacements
    Report DailyReport: EventNames=[Clock].DoReport
      VariableNames:
        [Clock].Today
        [Canola].Phenology.DaysAfterSowing
        [Canola].Phenology.CurrentStageName
        [Canola].Structure.LeafTipsAppeared
    Report HarvestReport: EventNames=[Canola].Harvesting
      VariableNames:
        [Canola].Phenology.CurrentStageName
        [Canola].Phenology.EmergenceDAS
        [Canola].Phenology.FloralInitiationDAS
        [Canola].Phenology.GreenBudDAS
        [Canola].Phenology.StartFloweringDAS
        [Canola].Phenology.CumulativeVernalTime
    Manager Harvesting
```csharp
using System;
using Models.Core;
using System.Collections.Generic;
using System.Text;
using Models.Soils;
using Models.PMF;
using Models;
using System.Xml.Serialization;
using APSIM.Shared.Utilities;

namespace Models
{
    [Serializable] 
    public class Script : Model
    {
        [Link] Plant Canola;
        [EventSubscribe("DoManagement")]
        private void OnDoManagement(object sender, EventArgs e)
        {
            if (Canola.Phenology.CurrentPhaseName == "ReadyForHarvesting")
            {
                Canola.Harvest();
                Canola.EndCrop();
            }
        }
    }
}
```
    Plant Canola: CropType=Canola; IsEnding=false; DaysAfterEnding=0
      OrganArbitrator Arbitrator
        RelativeAllocation NArbitrator
        RelativeAllocation DMArbitrator
      Phenology
        AirTemperatureFunction ThermalTime
          XYPairs: X=[2, 30, 35]; Y=[0, 28, 0]
        MultiplyFunction PPModifiedThermalTime
          VariableReference ThermalTime: VariableName=[Phenology].ThermalTime.Value()
          LinearInterpolationFunction PhotoperiodModifier: XProperty=[Phenology].Photoperiod.Value()
            XYPairs: X=[12, 16]; Y=[1, 1]
        AccumulateFunction CumulativeThermalTime: StartStageName=Germination; EndStageName=FloralInitiation; FractionRemovedOnCut=0; FractionRemovedOnHarvest=0; FractionRemovedOnGraze=0; FractionRemovedOnPrune=0
          VariableReference DailyValue: VariableName=[Phenology].ThermalTime.Value()
        AirTemperatureFunction VernalTime
          XYPairs: X=[0, 2, 8, 15]; Y=[0, 1, 0.5, 0]
        AccumulateFunction CumulativeVernalTime: StartStageName=Germination; EndStageName=FloralInitiation; FractionRemovedOnCut=0; FractionRemovedOnHarvest=0; FractionRemovedOnGraze=0; FractionRemovedOnPrune=0
          VariableReference DailyValue: VariableName=[Phenology].VernalTime.Value()
        PhotoperiodFunction Photoperiod: Twilight=-6; DayLength=0
        GerminatingPhase Germinating: Start=Sowing; End=Germination
        EmergingPhase Emerging: ShootLag=15; ShootRate=5; Start=Germination; End=Emergence; TTForTimeStep=0
          VariableReference ThermalTime: VariableName=[Phenology].ThermalTime.Value()
        GenericPhase Vegetative: Start=Emergence; End=FloralInitiation
          VariableReference Progression: VariableName=[Phenology].ThermalTime.Value()
          LinearInterpolationFunction Target: XProperty=[Phenology].CumulativeVernalTime.Value()
            XYPairs: X=[0, 25]; Y=[290, 1]
        LeafAppearancePhase BudDevelopment: Start=FloralInitiation; End=GreenBud
        GenericPhase StemElongation: Start=GreenBud; End=StartFlowering
          Constant Target: FixedValue=150
          VariableReference Progression: VariableName=[Phenology].PPModifiedThermalTime.Value()
        GenericPhase EarlyFlowering: Start=StartFlowering; End=StartPodDevelopment
          Memo
            The duration of the grain filling phase has been taken from the model of Robertson et al (2002).
          Constant Target: FixedValue=100
          VariableReference Progression: VariableName=[Phenology].ThermalTime.Value()
        GenericPhase EarlyPodDevelopment: Start=StartPodDevelopment; End=StartGrainFilling
          Memo
            The duration of the grain filling phase has been taken from the model of Robertson et al (2002).
          Constant Target: FixedValue=140
          VariableReference Progression: VariableName=[Phenology].ThermalTime.Value()
          VariableReference Stress: VariableName=[Phenology].Vegetative.PhotoperiodEffect.Value()
        GenericPhase EarlyGrainFilling: Start=StartGrainFilling; End=EndFlowering
          VariableReference Progression: VariableName=[Phenology].ThermalTime.Value()
          VariableReference Stress: VariableName=[Phenology].Vegetative.PhotoperiodEffect.Value()
          MultiplyFunction Target
            Constant FractionofGrainfilling: FixedValue=0.05
            VariableReference EntireGrainfilling
              VariableName=[Phenology].LateGrainFilling.Target.EntireGrainfillPeriod.FixedValue
        GenericPhase MidGrainFilling: Start=EndFlowering; End=EndPodDevelopment
          VariableReference Progression: VariableName=[Phenology].ThermalTime.Value()
          VariableReference Stress: VariableName=[Phenology].Vegetative.PhotoperiodEffect.Value()
          AirTemperatureFunction ThermalTimeNew
            XYPairs: X=[5, 20, 30, 40]; Y=[0, 10, 20, 0]
          MultiplyFunction Target
            Constant FractionofMidToLateGrainfilling: FixedValue=0.5
            SubtractFunction
              VariableReference EntireGrainfilling
                VariableName=[Phenology].LateGrainFilling.Target.EntireGrainfillPeriod.FixedValue
              VariableReference EarlyGrainfilling: VariableName=[Phenology].EarlyGrainFilling.Target.Value()
        GenericPhase LateGrainFilling: Start=EndPodDevelopment; End=EndGrainFill
          SubtractFunction Target
            Constant EntireGrainfillPeriod: FixedValue=500
            VariableReference EarlyGrainFillingTarget: VariableName=[Phenology].EarlyGrainFilling.Target.Value()
            VariableReference MidGrainFillingTarget: VariableName=[Phenology].MidGrainFilling.Target.Value()
          VariableReference Progression: VariableName=[Phenology].ThermalTime.Value()
          VariableReference Stress: VariableName=[Phenology].Vegetative.PhotoperiodEffect.Value()
          AirTemperatureFunction ThermalTimeNew
            XYPairs: X=[5, 20, 30, 40]; Y=[0, 10, 20, 0]
        GenericPhase Maturing: Start=EndGrainFill; End=Maturity
          Constant Target: FixedValue=5
          VariableReference Progression: VariableName=[Phenology].ThermalTime.Value()
        GenericPhase Ripening: Start=Maturity; End=HarvestRipe
          Constant Target: FixedValue=1
          VariableReference Progression: VariableName=[Phenology].ThermalTime.Value()
        EndPhase ReadyForHarvesting: Start=HarvestRipe; End=Unused
          VariableReference ThermalTime: VariableName=[Phenology].ThermalTime.Value()
        OnEventFunction NFF: SetEvent=StartFlowering; ReSetEvent=never
          Constant PreEventValue: FixedValue=0
          VariableReference PostEventValue: VariableName=[Phenology].Vegetative.CompletionNodeNumber.Value()
        OnEventFunction FN: SetEvent=StartGrainFilling; ReSetEvent=never
          Constant PreEventValue: FixedValue=0
          SubtractFunction PostEventValue
            VariableReference PostEventValue: VariableName=[Structure].LeafTipsAppeared
            VariableReference PostEventValue1: VariableName=[Phenology].NFF.Value()
        OnEventFunction EmergenceDAS: SetEvent=Emergence; ReSetEvent=never
          Memo
            A function is used to provide maturity date as days after sowing(DAS).
          Constant PreEventValue: FixedValue=0
          VariableReference PostEventValue: VariableName=[Phenology].DaysAfterSowing
        OnEventFunction FloralInitiationDAS: SetEvent=FloralInitiation; ReSetEvent=never
          Memo
            A function is used to provide flowering date as days after sowing(DAS).
          Constant PreEventValue: FixedValue=0
          VariableReference PostEventValue: VariableName=[Phenology].DaysAfterSowing
        OnEventFunction GreenBudDAS: SetEvent=GreenBud; ReSetEvent=never
          Memo
            A function is used to provide flowering date as days after sowing(DAS).
          Constant PreEventValue: FixedValue=0
          VariableReference PostEventValue: VariableName=[Phenology].DaysAfterSowing
        OnEventFunction StartFloweringDAS: SetEvent=StartFlowering; ReSetEvent=never
          Memo
            A function is used to provide flowering date as days after sowing(DAS).
          Constant PreEventValue: FixedValue=0
          VariableReference PostEventValue: VariableName=[Phenology].DaysAfterSowing
        OnEventFunction MaturityDAS: SetEvent=Maturity; ReSetEvent=never
          Memo
            A function is used to provide maturity date as days after sowing(DAS).
          Constant PreEventValue: FixedValue=0
          VariableReference PostEventValue: VariableName=[Phenology].DaysAfterSowing
      Structure: CohortInitialisationStage=Germination; LeafInitialisationStage=Emergence
        Constant DroughtInducedBranchMortality: FixedValue=0
        LinearInterpolationFunction HeightModel: XProperty=[Stem].Live.Wt
          XYPairs: X=[0, 300]; Y=[10, 750]
        MultiplyFunction BranchingRate
          LinearInterpolationFunction Potential_Branching_Rate: XProperty=[Structure].LeafTipsAppeared
            XYPairs: X=[0, 6, 7, 8, 9]; Y=[0, 0, 1, 0, 0]
          LinearInterpolationFunction Cover_response: XProperty=[leaf].CoverGreen
            XYPairs: X=[0, 0.17, 0.25]; Y=[1, 1, 0]
          LinearInterpolationFunction CHO_response: XProperty=[Stem].Live.StorageWt
            XYPairs: X=[0, 1, 10]; Y=[1, 1, 1]
        Constant BranchMortality: FixedValue=0
        LinearInterpolationFunction Phyllochron: XProperty=[Structure].LeafTipsAppeared
          XYPairs: X=[2, 3, 9.9, 10, 20]; Y=[60, 30, 30, 30, 30]
        Constant Plastochron: FixedValue=40
        Constant StemSenescenceAge: FixedValue=0
        HoldFunction FinalLeafNumber: WhenToHold=FloralInitiation
          AddFunction FLN
            Constant PrimordiaAtEmergence: FixedValue=3
            DivideFunction InitiatedPrimordia
              VariableReference TTBeforeFI: VariableName=[Phenology].Vegetative.ProgressThroughPhase
              VariableReference Plastochron: VariableName=[Structure].Plastochron
        PhaseLookup ThermalTime
          PhaseLookupValue Vegetative: Start=Sowing; End=FloralInitiation
            VariableReference Value: VariableName=[Phenology].ThermalTime.Value()
          PhaseLookupValue Reproductive: Start=FloralInitiation; End=StartFlowering
            VariableReference Value: VariableName=[Phenology].PPModifiedThermalTime.Value()
      ReproductiveOrgan Grain: GrowthRespiration=0; MaintenanceRespiration=0
        Biomass Live: DMDOfStructural=0.6
        Biomass Dead: DMDOfStructural=0.6
        Constant PotentialHarvestIndex: FixedValue=0.5
        AddFunction FillingDuration
          VariableReference EarlyGrainFillingDuration: VariableName=[Phenology].EarlyGrainFilling.Target.Value()
          VariableReference MidGrainFillingDuration: VariableName=[Phenology].MidGrainFilling.Target.Value()
          VariableReference LateGrainFillingDuration: VariableName=[Phenology].LateGrainFilling.Target.Value()
        Constant MaximumPotentialGrainSize: FixedValue=0.19
        PhaseLookup DMDemandFunction
          PhaseLookupValue GrainFilling: Start=StartGrainFilling; End=EndGrainFill
            MultiplyFunction HIGrainDemand
              VariableReference AboveGroundWt: VariableName=[AboveGround].Wt
              DivideFunction HarvestIndexIncrease
                VariableReference PotentialHarvestIndex: VariableName=[Grain].PotentialHarvestIndex.Value()
                VariableReference FillingDuration: VariableName=[Grain].FillingDuration.Value()
              VariableReference ThermalTime: VariableName=[Phenology].ThermalTime.Value()
            FillingRateFunction
              VariableReference NumberFunction: VariableName=[Grain].NumberFunction.Value()
              VariableReference ThermalTime: VariableName=[Phenology].ThermalTime.Value()
              VariableReference PotentialSizeIncrement: VariableName=[Grain].MaximumPotentialGrainSize.Value()
              VariableReference FillingDuration: VariableName=[Grain].FillingDuration.Value()
        Constant MinimumNConc: FixedValue=0.05
        Constant MaximumNConc: FixedValue=0.058
        Constant WaterContent: FixedValue=0.12
        MultiplyFunction NFillingRate
          VariableReference NConc: VariableName=[Grain].MaximumNConc.Value()
          VariableReference DMDemand: VariableName=[Grain].DMDemands.Structural.DMDemandFunction.Value()
          VariableReference DMConversionEfficiency: VariableName=[Grain].DMConversionEfficiency.Value()
        PhaseLookup NFillingRateOLD
          PhaseLookupValue GrainFilling: Start=StartGrainFilling; End=EndGrainFill
            FillingRateFunction
              VariableReference NumberFunction: VariableName=[Grain].NumberFunction.Value()
              VariableReference ThermalTime: VariableName=[Phenology].ThermalTime.Value()
              MultiplyFunction PotentialSizeIncrement
                Constant MaximumFinalNConc: FixedValue=0.04
                VariableReference MaximumSize: VariableName=[Grain].MaximumPotentialGrainSize.Value()
              AddFunction FillingDuration
                VariableReference LatePodDevelopmentDuration: VariableName=[Phenology].LatePodDevelopment.Target.Value()
                VariableReference LateGrainFillingDuration1: VariableName=[Phenology].LateGrainFilling.Target.Value()
        MultiplyFunction NumberFunction
          Constant PeasPerPod: FixedValue=1
          VariableReference PodNumber: VariableName=[Shell].PodNumber.Value()
        BiomassRemoval BiomassRemovalDefaults
          OrganBiomassRemovalType Harvest: FractionLiveToRemove=1; FractionDeadToRemove=0; FractionLiveToResidue=0; FractionDeadToResidue=0
          OrganBiomassRemovalType Cut: FractionLiveToRemove=1; FractionDeadToRemove=0; FractionLiveToResidue=0; FractionDeadToResidue=0
          OrganBiomassRemovalType Prune: FractionLiveToRemove=0; FractionDeadToRemove=0; FractionLiveToResidue=0.8; FractionDeadToResidue=0
          OrganBiomassRemovalType Graze: FractionLiveToRemove=0.6; FractionDeadToRemove=0; FractionLiveToResidue=0.2; FractionDeadToResidue=0
        Constant DMConversionEfficiency: FixedValue=0.694
        Constant RemobilisationCost: FixedValue=0
        Constant CarbonConcentration: FixedValue=0.4
        DivideFunction HarvestIndex
          VariableReference GrainWt: VariableName=[Grain].Wt
          VariableReference AboveGroundWt: VariableName=[AboveGround].Wt
      Root: GrowthRespiration=0; MaintenanceRespiration=0
        LinearInterpolationFunction KLModifier: XProperty=[Leaf].LAI
          XYPairs: X=[0, 3]; Y=[1, 1]
        AirTemperatureFunction TemperatureEffect
          XYPairs: X=[0, 26, 35]; Y=[1, 1, 1]
        Constant MaxDailyNUptake: FixedValue=6
        Constant SenescenceRate: FixedValue=0.005
        Constant MaximumRootDepth: FixedValue=1000000
        PhaseLookup RootFrontVelocity
          PhaseLookupValue PreEmergence: Start=Germination; End=Emergence
            Constant Function: FixedValue=5
          PhaseLookupValue early: Start=Emergence; End=StartGrainFilling
            Constant Function: FixedValue=30
          PhaseLookupValue late: Start=StartGrainFilling; End=Maturity
            Constant Function: FixedValue=5
        Constant MaximumNConc: FixedValue=0.01
        Constant MinimumNConc: FixedValue=0.005
        PhaseBasedSwitch NitrogenDemandSwitch: Start=Emergence; End=EndGrainFill
        LinearInterpolationFunction KNO3: XProperty=[Root].LengthDensity
          XYPairs: X=[0, 0.003]; Y=[0.02, 0.02]
        LinearInterpolationFunction KNH4: XProperty=[Root].LengthDensity
          XYPairs: X=[0, 0.003]; Y=[0, 0]
        BiomassRemoval BiomassRemovalDefaults
          OrganBiomassRemovalType Harvest: FractionLiveToRemove=0; FractionDeadToRemove=0; FractionLiveToResidue=0.2; FractionDeadToResidue=0
          OrganBiomassRemovalType Cut: FractionLiveToRemove=0; FractionDeadToRemove=0; FractionLiveToResidue=0.3; FractionDeadToResidue=0
          OrganBiomassRemovalType Prune: FractionLiveToRemove=0; FractionDeadToRemove=0; FractionLiveToResidue=0.1; FractionDeadToResidue=0
          OrganBiomassRemovalType Graze: FractionLiveToRemove=0; FractionDeadToRemove=0; FractionLiveToResidue=0.15; FractionDeadToResidue=0
        LinearInterpolationFunction NUptakeSWFactor: XProperty=[Root].RWC
          XYPairs: X=[0, 1]; Y=[0, 1]
        Constant InitialDM: FixedValue=0.2; Units=g/plant
        Constant SpecificRootLength: FixedValue=40; Units=m/g
        Constant DMConversionEfficiency: FixedValue=1
        Constant MaintenanceRespirationFunction: FixedValue=1
        Constant RemobilisationCost: FixedValue=0
        Constant CarbonConcentration: FixedValue=0.4
        BiomassDemand DMDemands
          MultiplyFunction Structural
            PartitionFractionDemandFunction DMDemandFunction
              PhaseLookup PartitionFraction
                PhaseLookupValue Early: Start=Emergence; End=StartFlowering
                  Constant Function: FixedValue=0.2
                PhaseLookupValue Middle: Start=StartFlowering; End=StartGrainFilling
                  Constant Function: FixedValue=0.1
                PhaseLookupValue Late: Start=StartGrainFilling; End=Maturity
                  Constant Function: FixedValue=0
            Constant StructuralFraction: FixedValue=1
          Constant Metabolic: FixedValue=0
          StorageDMDemandFunction Storage
            SubtractFunction StorageFraction
              Constant One: FixedValue=1
              VariableReference StructuralFraction: VariableName=[Root].DMDemands.Structural.StructuralFraction.Value()
        BiomassDemand NDemands
          MultiplyFunction Structural
            VariableReference MinNconc: VariableName=[Root].minimumNconc.Value()
            VariableReference PotentialDMAllocation: VariableName=[Root].potentialDMAllocation.Structural
          MultiplyFunction Metabolic
            SubtractFunction MetabolicNconc
              VariableReference CritNconc: VariableName=[Root].criticalNConc.Value()
              VariableReference MinNconc: VariableName=[Root].minimumNconc.Value()
            VariableReference PotentialDMAllocation: VariableName=[Root].potentialDMAllocation.Structural
          StorageNDemandFunction Storage
            VariableReference NitrogenDemandSwitch: VariableName=[Root].nitrogenDemandSwitch.Value()
            VariableReference MaxNconc: VariableName=[Root].maximumNconc.Value()
      Nodule
        Constant FixationMetabolicCost: FixedValue=0
        Constant MaximumNConc: FixedValue=0.02
        Constant MinimumNConc: FixedValue=0.01
        Constant SenescenceRate: FixedValue=0
        Constant NReallocationFactor: FixedValue=0
        PhaseBasedSwitch NitrogenDemandSwitch: Start=Emergence; End=EndGrainFill
        BiomassRemoval BiomassRemovalDefaults
          OrganBiomassRemovalType Harvest: FractionLiveToRemove=0.5; FractionDeadToRemove=0; FractionLiveToResidue=0.1; FractionDeadToResidue=0
          OrganBiomassRemovalType Cut: FractionLiveToRemove=0.8; FractionDeadToRemove=0; FractionLiveToResidue=0; FractionDeadToResidue=0
          OrganBiomassRemovalType Prune: FractionLiveToRemove=0; FractionDeadToRemove=0; FractionLiveToResidue=0.6; FractionDeadToResidue=0
          OrganBiomassRemovalType Graze: FractionLiveToRemove=0.6; FractionDeadToRemove=0; FractionLiveToResidue=0.2; FractionDeadToResidue=0
        Constant InitialWtFunction: FixedValue=0; Units=g/m^2
        Constant DetachmentRateFunction: FixedValue=0; Units=/d
        MultiplyFunction FixationRateOLD
          VariableReference NoduleWt: VariableName=[Nodule].Live.Wt
          Constant SpecificNitrogenaseActivity: FixedValue=0.1
          MinimumFunction StressFactor
            AirTemperatureFunction FT
              XYPairs: X=[0, 20, 30, 40]; Y=[0, 1, 1, 0]
            LinearInterpolationFunction FW: XProperty=[Leaf].Fw
              XYPairs: X=[0, 1, 1.5]; Y=[0, 1, 1]
        Constant MaintenanceRespirationFunction: FixedValue=0; Units=0-1
        Constant DMConversionEfficiency: FixedValue=1; Units=0-1
        Constant NRetranslocationFactor: FixedValue=0
        Constant DMReallocationFactor: FixedValue=0
        Constant DMRetranslocationFactor: FixedValue=0
        VariableReference CriticalNConc: VariableName=[Nodule].MinimumNConc.Value()
        Constant RemobilisationCost: FixedValue=0
        Constant CarbonConcentration: FixedValue=0.4
        HoldFunction FixationRate: WhenToHold=StartGrainFilling
          MinimumFunction DailyPotentialFixationRate
            MultiplyFunction PotentialFixationRate
              VariableReference Biomass: VariableName=[AboveGround].Wt
              PhaseLookup SpecificFixationRate
                PhaseLookupValue VegetativeGrowth: Start=Emergence; End=StartFlowering
                  Constant Rate: FixedValue=0.006
                PhaseLookupValue ReproductiveGrowth: Start=StartFlowering; End=EndGrainFill
                  Constant Rate: FixedValue=0.002
            Constant MaximumFixationRate: FixedValue=0.6
        BiomassDemand DMDemands
          MultiplyFunction Structural
            PartitionFractionDemandFunction DMDemandFunction
              PhaseLookup PartitionFraction
                PhaseLookupValue Early: Start=Emergence; End=StartFlowering
                  Constant Function: FixedValue=0.03
                PhaseLookupValue Middle: Start=StartFlowering; End=StartGrainFilling
                  Constant Function: FixedValue=0.02
                PhaseLookupValue Late: Start=StartGrainFilling; End=Maturity
                  Constant Function: FixedValue=0
            Constant StructuralFraction: FixedValue=1; Units=g/g
          Constant Metabolic: FixedValue=0
          StorageDMDemandFunction Storage
            SubtractFunction StorageFraction
              Constant One: FixedValue=1
              VariableReference StructuralFraction: VariableName=[Nodule].DMDemands.Structural.StructuralFraction.Value()
        BiomassDemand NDemands
          MultiplyFunction Structural
            VariableReference MinNconc: VariableName=[Nodule].minimumNconc.Value()
            VariableReference PotentialDMAllocation: VariableName=[Nodule].potentialDMAllocation.Structural
          MultiplyFunction Metabolic
            SubtractFunction MetabolicNconc
              VariableReference CritNconc: VariableName=[Nodule].criticalNConc.Value()
              VariableReference MinNconc: VariableName=[Nodule].minimumNconc.Value()
            VariableReference PotentialDMAllocation: VariableName=[Nodule].potentialDMAllocation.Structural
          StorageNDemandFunction Storage
            VariableReference NitrogenDemandSwitch: VariableName=[Nodule].nitrogenDemandSwitch.Value()
            VariableReference MaxNconc: VariableName=[Nodule].maximumNconc.Value()
      GenericOrgan Shell
        AccumulateFunction PodNumber: StartStageName=StartPodDevelopment; EndStageName=EndFlowering; FractionRemovedOnCut=0; FractionRemovedOnHarvest=0; FractionRemovedOnGraze=0; FractionRemovedOnPrune=0
          MultiplyFunction DailyPodAppearanceRate
            DivideFunction PodAppearanceRate
              Constant PodsPerNode: FixedValue=8
              VariableReference NodeAppearanceRate: VariableName=[Structure].Phyllochron.Value()
            VariableReference ThermalTime: VariableName=[Phenology].ThermalTime.Value()
            VariableReference PlantPopulation: VariableName=[Canola].SowingData.Population
        Constant NReallocationFactor: FixedValue=0
        Constant NRetranslocationFactor: FixedValue=0.1
        Constant MaximumNConc: FixedValue=0.009
        Constant MinimumNConc: FixedValue=0.01
        Constant DMRetranslocationFactor: FixedValue=0.1
        PhaseBasedSwitch NitrogenDemandSwitch: Start=Germination; End=Maturity
        BiomassRemoval BiomassRemovalDefaults: same as Replacements.Canola.Nodule.BiomassRemovalDefaults
        Constant InitialWtFunction: FixedValue=0; Units=g/m^2
        Constant SenescenceRate: FixedValue=0; Units=/d
        Constant DetachmentRateFunction: FixedValue=0; Units=/d
        Constant MaintenanceRespirationFunction: FixedValue=0; Units=0-1
        Constant DMConversionEfficiency: FixedValue=1; Units=0-1
        Constant DMReallocationFactor: FixedValue=0
        VariableReference CriticalNConc: VariableName=[Shell].MinimumNConc.Value()
        Constant RemobilisationCost: FixedValue=0
        Constant CarbonConcentration: FixedValue=0.4
        MultiplyFunction PodNumberOld
          Constant PodsPerNode: FixedValue=1
          VariableReference StemPopulation: VariableName=[Structure].TotalStemPopn
          PhaseLookupValue FloweringNodes: Start=StartFlowering; End=HarvestRipe
            SubtractFunction FloweringNodes
              VariableReference TotalNodes: VariableName=[Structure].LeafTipsAppeared
              VariableReference VegetativeNodes: VariableName=[Phenology].NFF.Value()
        HoldFunction PodNumberByStem: WhenToHold=StartGrainFilling
          MultiplyFunction Value
            Constant PodsPerGStem: FixedValue=5
            VariableReference StemMass: VariableName=[Stem].Live.Wt
        PopulationBasedDemandFunction DMDemandFunctionOLD
          VariableReference ThermalTime: VariableName=[Phenology].ThermalTime.Value()
          VariableReference OrganPopulation: VariableName=[Shell].PodNumber.Value()
          Constant ExpansionStress: FixedValue=1
          AddFunction GrowthDuration
            VariableReference EarlyPodDevelopmentDuration: VariableName=[Phenology].EarlyPodDevelopment.Target.Value()
            VariableReference EarlyGrainFillingDuration: VariableName=[Phenology].EarlyGrainFilling.Target.Value()
            VariableReference MidGrainFillingDuration: VariableName=[Phenology].MidGrainFilling.Target.Value()
          Constant StartStage: FixedValue=5
          Constant MaximumOrganWt: FixedValue=0.08
        Constant PotentialHarvestIndex: FixedValue=0.1
        AddFunction FillingDuration: same as Replacements.Canola.Shell.DMDemandFunctionOLD.GrowthDuration
        BiomassDemand DMDemands
          MultiplyFunction Structural
            PhaseLookup DMDemandFunction
              PhaseLookupValue PodDevelopment: Start=StartPodDevelopment; End=EndPodDevelopment
                MultiplyFunction HIPodDemand
                  VariableReference AboveGroundWt: VariableName=[AboveGround].Wt
                  DivideFunction HarvestIndexIncrease
                    VariableReference PotentialHarvestIndex: VariableName=[Shell].PotentialHarvestIndex.Value()
                    VariableReference FillingDuration: VariableName=[Shell].FillingDuration.Value()
                  VariableReference ThermalTime: VariableName=[Phenology].ThermalTime.Value()
                FillingRateFunction: same as Replacements.Canola.Grain.DMDemandFunction.GrainFilling.FillingRateFunction
            Constant StructuralFraction: FixedValue=0.7
          Constant Metabolic: FixedValue=0
          StorageDMDemandFunction Storage
            SubtractFunction StorageFraction
              Constant One: FixedValue=1
              VariableReference StructuralFraction: VariableName=[Shell].DMDemands.Structural.StructuralFraction.Value()
        BiomassDemand NDemands
          MultiplyFunction Structural
            VariableReference MinNconc: VariableName=[Shell].minimumNconc.Value()
            VariableReference PotentialDMAllocation: VariableName=[Shell].potentialDMAllocation.Structural
          MultiplyFunction Metabolic
            SubtractFunction MetabolicNconc
              VariableReference CritNconc: VariableName=[Shell].criticalNConc.Value()
              VariableReference MinNconc: VariableName=[Shell].minimumNconc.Value()
            VariableReference PotentialDMAllocation: VariableName=[Shell].potentialDMAllocation.Structural
          StorageNDemandFunction Storage
            VariableReference NitrogenDemandSwitch: VariableName=[Shell].nitrogenDemandSwitch.Value()
            VariableReference MaxNconc: VariableName=[Shell].maximumNconc.Value()
      Leaf: MaxCover=1; Albedo=0.25; Gsmax350=0.011; R50=150; MicroClimatePresent=true; KDead=0.3; MaximumMainStemLeafNumber=40
        zero: CurrentExpandingLeaf, StartFractionExpanded, FractionNextleafExpanded, DeadNodesYesterday, GrowthRespiration, FRGR, PotentialEP, WaterDemand, TipsAtEmergence, CohortsAtInitialisation, FractionDied
        LeafCohort InitialLeaf1: Rank=1; Area=100
          zero: NReallocationFactor, DMReallocationFactor, NRetranslocationFactor, DMRetranslocationFactor, ShadeInducedSenRate, SenescedFrac, DeltaPotentialArea, DeltaStressConstrainedArea, DeltaCarbonConstrainedArea, PotentialStructuralDMAllocation, PotentialMetabolicDMAllocation, MetabolicNReallocated, MetabolicWtReallocated, StorageNReallocated, StorageWtReallocated, MetabolicNRetranslocated, StorageNRetrasnlocated, DMRetranslocated, MetabolicNAllocation, StructuralDMAllocation, MetabolicDMAllocation, MaintenanceRespiration
        VariableReference ThermalTime: VariableName=[Phenology].ThermalTime.Value()
        LeafCohortParameters: ExpansionStressValue=0
          Constant SenessingLeafRelativeSize: FixedValue=1; Units=0-1
          MultiplyFunction GrowthDuration
            VariableReference Phyllochron: VariableName=[Structure].Phyllochron.Value()
            LinearInterpolationFunction AgeFactor: XProperty=[Leaf].AppearedCohortNo
              XYPairs: X=[1, 5, 10, 20]; Y=[1, 2, 4, 8]
          MultiplyFunction MaxArea
            LinearInterpolationFunction RelativeArea: XProperty=[Leaf].AppearedCohortNo
              XYPairs: X=[2, 7, 10, 18]; Y=[0.6666, 1, 1, 0.83]
            Constant LargestLeaf: FixedValue=12000
          Constant LagDuration: FixedValue=1000000; Units=0-1
          LinearInterpolationFunction SenescenceDuration: XProperty=[Phenology].Stage
            XYPairs: X=[1, 5, 5.5, 6]; Y=[80, 80, 40, 10]
          Constant DetachmentLagDuration: FixedValue=0
          Constant DetachmentDuration: FixedValue=20
          LinearInterpolationFunction SpecificLeafAreaMax: XProperty=[Leaf].LAI
            XYPairs: X=[0.5, 0.8, 1, 2, 3, 4]; Y=[35000, 35000, 34500, 30000, 25000, 20000]
          Constant StructuralFraction: FixedValue=0.7
          LinearInterpolationFunction SpecificLeafAreaMin: XProperty=[Leaf].LAI
            XYPairs: X=[0.5, 0.8, 1, 2, 3, 4]; Y=[40000, 35000, 30000, 30000, 30000, 27000]
          LinearInterpolationFunction ExpansionStress: XProperty=[Canola].Leaf.Fw
            XYPairs: X=[0, 1]; Y=[0, 1]
          Constant MinimumNConc: FixedValue=0.02
          Constant CriticalNConc: FixedValue=0.05
          Constant MaximumNConc: FixedValue=0.08
          Constant NReallocationFactor: FixedValue=1
          Constant DMRetranslocationFactor: FixedValue=0.5
          LinearInterpolationFunction ShadeInducedSenescenceRate: XProperty=[Leaf].CohortCurrentRankCoverAbove
            XYPairs: X=[0, 0.9, 0.90001]; Y=[0, 0, 0]
          Constant InitialNConc: FixedValue=0
          Constant StorageFraction: FixedValue=0
          Constant DMReallocationFactor: FixedValue=0
          Constant LeafSizeShapeParameter: FixedValue=0.01
          Constant MaintenanceRespirationFunction: FixedValue=0
          Constant DroughtInducedSenAcceleration: FixedValue=1
          Constant CellDivisionStress: FixedValue=1; Units=0-1
          Constant DroughtInducedLagAcceleration: FixedValue=1
          ArrayFunction LagDurationAgeMultiplier: Values=1 1 1
          ArrayFunction SenescenceDurationAgeMultiplier: Values=1 1 1
          ArrayFunction LeafSizeAgeMultiplier: Values=1 1 1 1 1 1 1 1 1 1 1 1
          Constant RemobilisationCost: FixedValue=0
          Constant CarbonConcentration: FixedValue=0.4
          Constant NRetranslocationFactor: FixedValue=0.5
        LinearInterpolationFunction ExtinctionCoeff: XProperty=[Canola].SowingData.RowSpacing
          XYPairs: X=[200, 1000]; Y=[0.6, 0.4]
        RUEModel Photosynthesis
          Constant RUE: FixedValue=1
          WeightedTemperatureFunction FT: MaximumTemperatureWeighting=0.5
            XYPairs: X=[10, 20, 30, 40]; Y=[0, 1, 1, 0]
          LinearInterpolationFunction FVPD: XProperty=[Leaf].Photosynthesis.VPD
            XYPairs: X=[0, 10, 50]; Y=[1, 1, 1]
          LinearInterpolationFunction FN: XProperty=[Leaf].Fn
            XYPairs: X=[0, 1, 1.5]; Y=[1, 1, 1]
          LinearInterpolationFunction FW: XProperty=[Leaf].Fw
            XYPairs: X=[0, 1]; Y=[0, 1]
          RUECO2Function FCO2: PhotosyntheticPathway=C3
          VariableReference RadnInt: VariableName=[Leaf].RadIntTot
        MinimumFunction FRGRFunction
          VariableReference RUE_FT: VariableName=[Leaf].Photosynthesis.FT.Value()
          MinimumFunction Others
            VariableReference RUE_FN: VariableName=[Leaf].Photosynthesis.FN.Value()
            VariableReference RUE_FVPD: VariableName=[Leaf].Photosynthesis.FVPD.Value()
        LinearInterpolationFunction FrostFraction: XProperty=[Weather].MinT
          XYPairs: X=[-1, 0]; Y=[0, 0]
        BiomassRemoval BiomassRemovalDefaults
          OrganBiomassRemovalType Harvest: FractionLiveToRemove=0; FractionDeadToRemove=0; FractionLiveToResidue=0.3; FractionDeadToResidue=0
          OrganBiomassRemovalType Cut: FractionLiveToRemove=0.8; FractionDeadToRemove=0; FractionLiveToResidue=0; FractionDeadToResidue=0
          OrganBiomassRemovalType Prune: FractionLiveToRemove=0; FractionDeadToRemove=0; FractionLiveToResidue=0.6; FractionDeadToResidue=0
          OrganBiomassRemovalType Graze: FractionLiveToRemove=0.6; FractionDeadToRemove=0; FractionLiveToResidue=0.1; FractionDeadToResidue=0
        Constant StructuralFraction: FixedValue=0.5
        Constant DMConversionEfficiency: FixedValue=1
        Constant RemobilisationCost: FixedValue=0
        Constant CarbonConcentration: FixedValue=0.4
        Constant StomatalConductanceCO2Modifier: FixedValue=1
      GenericOrgan Stem
        Constant NReallocationFactor: FixedValue=0
        Constant NRetranslocationFactor: FixedValue=0.1
        PhaseLookup DMRetranslocationFactor
          PhaseLookupValue GrainFilling: Start=StartGrainFilling; End=EndGrainFill
            Constant RetranslocationFactor: FixedValue=0.2
        LinearInterpolationFunction MaximumNConc: XProperty=[Phenology].Stage
          XYPairs: X=[3, 4, 5]; Y=[0.025, 0.02, 0.015]
        Constant MinimumNConc: FixedValue=0.005
        PhaseBasedSwitch NitrogenDemandSwitch: Start=Emergence; End=StartGrainFilling
        BiomassRemoval BiomassRemovalDefaults: same as Replacements.Canola.Nodule.BiomassRemovalDefaults
        Constant InitialWtFunction: FixedValue=0; Units=g/m^2
        Constant SenescenceRate: FixedValue=0; Units=/d
        Constant DetachmentRateFunction: FixedValue=0; Units=/d
        Constant MaintenanceRespirationFunction: FixedValue=0; Units=0-1
        Constant DMConversionEfficiency: FixedValue=1; Units=0-1
        Constant DMReallocationFactor: FixedValue=0
        VariableReference CriticalNConc: VariableName=[Stem].MinimumNConc.Value()
        Constant RemobilisationCost: FixedValue=0
        Constant CarbonConcentration: FixedValue=0.4
        BiomassDemand DMDemands
          MultiplyFunction Structural
            PartitionFractionDemandFunction DMDemandFunction
              PhaseLookup PartitionFraction
                PhaseLookupValue StemGrowthPhase: Start=Emergence; End=EndFlowering
                  LinearInterpolationFunction StemFraction: XProperty=[AboveGround].Wt
                    XYPairs: X=[0, 200, 201, 400]; Y=[0.5, 0.5, 0.62, 0.62]
                PhaseLookupValue GrainFilling: Start=EndFlowering; End=EndGrainFill
                  Constant StemFraction: FixedValue=0
            Constant StructuralFraction: FixedValue=0.7
          Constant Metabolic: FixedValue=0
          StorageDMDemandFunction Storage
            SubtractFunction StorageFraction
              Constant One: FixedValue=1
              VariableReference StructuralFraction: VariableName=[Stem].DMDemands.Structural.StructuralFraction.Value()
        BiomassDemand NDemands
          MultiplyFunction Structural
            VariableReference MinNconc: VariableName=[Stem].minimumNconc.Value()
            VariableReference PotentialDMAllocation: VariableName=[Stem].potentialDMAllocation.Structural
          MultiplyFunction Metabolic
            SubtractFunction MetabolicNconc
              VariableReference CritNconc: VariableName=[Stem].criticalNConc.Value()
              VariableReference MinNconc: VariableName=[Stem].minimumNconc.Value()
            VariableReference PotentialDMAllocation: VariableName=[Stem].potentialDMAllocation.Structural
          StorageNDemandFunction Storage
            VariableReference NitrogenDemandSwitch: VariableName=[Stem].nitrogenDemandSwitch.Value()
            VariableReference MaxNconc: VariableName=[Stem].maximumNconc.Value()
      CompositeBiomass AboveGround: DMDOfStructural=0.6
        Propertys=[[Leaf].Live, [Leaf].Dead, [Stem].Live, [Stem].Dead, [Grain].Live, [Grain].Dead, [Shell].Live, [Shell].Dead]
      CompositeBiomass AboveGroundLive: Propertys=[[Leaf].Live, [Stem].Live, [Grain].Live, [Shell].Live]; DMDOfStructural=0.6
      CompositeBiomass BelowGround: Propertys=[[Root].Live, [Root].Dead, [Nodule].Live, [Nodule].Dead]; DMDOfStructural=0.6
      CompositeBiomass Total: DMDOfStructural=0.6
        Propertys=[[Leaf].Live, [Leaf].Dead, [Stem].Live, [Stem].Dead, [Grain].Live, [Grain].Dead, [Shell].Live, [Shell].Dead, [Root].Live, [Root].Dead, [Nodule].Live, [Nodule].Dead]
      CompositeBiomass TotalLive: DMDOfStructural=0.6
        Propertys=[[Leaf].Live, [Stem].Live, [Grain].Live, [Shell].Live, [Root].Live, [Nodule].Live]
      CompositeBiomass TotalDead: DMDOfStructural=0.6
        Propertys=[[Leaf].Dead, [Stem].Dead, [Grain].Dead, [Shell].Dead, [Root].Dead, [Nodule].Dead]
      CompositeBiomass Pod: Propertys=[[Shell].Live, [Shell].Dead, [Grain].Live, [Grain].Dead]; DMDOfStructural=0.6
      Memo
        ## References

        ### **Ayaz S, McKenzie BA, McNeil DL, Hill GD.** **2004**. Light interception and utilization of four grain legumes sown at different plant populations and depths. _Journal of Agricultural Science,_ **142**: 297-308.
         **Ayaz S, McKenzie BA, Hill GD, McNeil DL.** **2004**. Variability in yield of four grain legume species in a subhumid temperate environment. II. Yield components. _Journal of Agricultural Science,_ **142**: 21-28.
         **Ayaz S, McKenzie BA, Hill GD, McNeil DL.** **2004**. Nitrogen distribution in four grain legumes. _Journal of Agricultural Science,_ **142**: 309-317.
         **Wilson DR, Robertson MJ.** **1996.** Pea phenology responses to temperature and photoperiod. _Australian Agronomy Society_.
      Cultivar Archer
        Command:
          [Phenology].Vegetative.Target.XYPairs.X = 0,20
          [Phenology].Vegetative.Target.XYPairs.Y = 450,200
          // First leaf 2 Phyllochrons
          // last leaves at 0.55 Phyllochron
          [Structure].Phyllochron.XYPairs.X=2,3,6,7
          [Structure].Phyllochron.XYPairs.Y=90,47,47,26
      Cultivar ATR_Wahoo
        Command:
          [Phenology].Vegetative.Target.XYPairs.X = 0,20
          [Phenology].Vegetative.Target.XYPairs.Y = 300,200
          [Structure].Phyllochron.XYPairs.X=2,3,6,7
          [Structure].Phyllochron.XYPairs.Y=100,50,50,28
      Cultivar NS_Diamond
        Command:
          [Phenology].Vegetative.Target.XYPairs.X = 0,20
          [Phenology].Vegetative.Target.XYPairs.Y = 350,275
          [Structure].Phyllochron.XYPairs.X=2,3,6,7
          [Structure].Phyllochron.XYPairs.Y=100,50,50,28
      Cultivar Monty
      Cultivar K50055
        Command:
          [Phenology].Vegetative.Target.XYPairs.X = 0,25
          [Phenology].Vegetative.Target.XYPairs.Y = 200,1
          [Structure].Phyllochron.XYPairs.X=2,3,6,7
          [Structure].Phyllochron.XYPairs.Y=100,50,50,28
      Cultivar Arazzo
        Command:
          [Phenology].Vegetative.Target.XYPairs.X = 0,25
          [Phenology].Vegetative.Target.XYPairs.Y = 200,1
          [Structure].Phyllochron.XYPairs.X=2,3,6,7
          [Structure].Phyllochron.XYPairs.Y=100,51,51,28
      Cultivar AV_Zircon
        Command:
          [Phenology].Vegetative.Target.XYPairs.X = 0,25
          [Phenology].Vegetative.Target.XYPairs.Y = 200,1
          [Structure].Phyllochron.XYPairs.X=2,3,6,7
          [Structure].Phyllochron.XYPairs.Y=96,48,48,27
      Cultivar ATR_Bonito
        Command:
          [Phenology].Vegetative.Target.XYPairs.X = 0,20
          [Phenology].Vegetative.Target.XYPairs.Y = 300,200
          [Structure].Phyllochron.XYPairs.X=2,3,6,7
          [Structure].Phyllochron.XYPairs.Y=100,50,50,28
      Cultivar Sensation
        Command:
          [Phenology].Vegetative.Target.XYPairs.X = 0,25
          [Phenology].Vegetative.Target.XYPairs.Y = 200,1
          [Structure].Phyllochron.XYPairs.X=2,3,6,7
          [Structure].Phyllochron.XYPairs.Y=100,50,50,28
      Cultivar Victory_7001_CL
        Command:
          [Phenology].Vegetative.Target.XYPairs.X = 0,25
          [Phenology].Vegetative.Target.XYPairs.Y = 200,1
          [Structure].Phyllochron.XYPairs.X=2,3,6,7
          [Structure].Phyllochron.XYPairs.Y=100,51,51,28
      Cultivar 45Y91_CL
        Command:
          [Phenology].Vegetative.Target.XYPairs.X = 0,25
          [Phenology].Vegetative.Target.XYPairs.Y = 200,1
          [Structure].Phyllochron.XYPairs.X=2,3,6,7
          [Structure].Phyllochron.XYPairs.Y=100,49,49,27
      Cultivar ATR_Stingray
        Command:
          [Phenology].Vegetative.Target.XYPairs.X = 0,20
          [Phenology].Vegetative.Target.XYPairs.Y = 350,200
          [Structure].Phyllochron.XYPairs.X=2,3,6,7
          [Structure].Phyllochron.XYPairs.Y=100,49,49,27
      Cultivar Hyola_970_CL
        Command:
          [Phenology].Vegetative.Target.XYPairs.X = 0,8,12,20,40
          [Phenology].Vegetative.Target.XYPairs.Y = 2500,2500,1200,600,200
          [Structure].Phyllochron.XYPairs.X=2,3,6,7
          [Structure].Phyllochron.XYPairs.Y=100,51,51,28
      Cultivar Hyola_971_CL
        Command:
          [Phenology].Vegetative.Target.XYPairs.X = 0,8,12,20,40
          [Phenology].Vegetative.Target.XYPairs.Y = 2500,2500,1200,600,200
          [Structure].Phyllochron.XYPairs.X=2,3,6,7
          [Structure].Phyllochron.XYPairs.Y=100,50,50,28
      Cultivar Oscar
        Command:
          [Phenology].Vegetative.Target.XYPairs.X = 0,20
          [Phenology].Vegetative.Target.XYPairs.Y = 400,350
          [Structure].Phyllochron.XYPairs.X=2,3,6,7
          [Structure].Phyllochron.XYPairs.Y=94,47,47,26
      Cultivar AV_Garnet
        Command:
          [Phenology].Vegetative.Target.XYPairs.X = 0,20
          [Phenology].Vegetative.Target.XYPairs.Y = 450,350
          [Structure].Phyllochron.XYPairs.X=2,3,6,7
          [Structure].Phyllochron.XYPairs.Y=100,51,51,28
  Folder Validation
    Memo
      A test dataset has been developed to test the APSIM Canola model for a range of environmental (soil and climate) conditions, management options (sowing dates, populations, nitrogen rates, irrigation) and genetic backgrounds (different regions, cultivar types).  These tests have been groups into various geographical regions to allow the user to evaluate the suitability of the model for their particular region of interest.  Graphs of model performance are provided for yield, biomass production, canopy development, phenological development, water and nitrogen uptake, and grain yield components.
    Folder OCPPhenology
      Experiment Gatton2016
        Factors
          Factor TOS
            Factor 1
              Specifications:
                [SowingRule].Script.SowDate=19-Apr
                [Weather]
              Weather Natural: FileName=Gatton.met
            Factor 2
              Specifications:
                [SowingRule].Script.SowDate=5-May
                [Weather]
              Weather Natural: FileName=Gatton.met
            Factor 3
              Specifications:
                [SowingRule].Script.SowDate=10-May
                [Weather]
              Weather Natural: FileName=Gatton.met
              Weather 14: FileName=GattonPP14H.met
              Weather 16: FileName=GattonPP16H.met
            Factor 4
              Specifications:
                [SowingRule].Script.SowDate=20-May
                [Weather]
              Weather Natural: FileName=Gatton.met
          Factor Cv
            Specifications=[SowingRule].Script.CultivarName=Archer,ATR_Wahoo,ATR_Stingray,NS_Diamond,Hyola_970_CL,Hyola_971_CL,Oscar,AV_Garnet
          Memo
            [SowingRule].Script.CultivarName=Archer,ATR_Wahoo,
            [SowingRule].Script.CultivarName=44Y90_CL,45Y91_CL,Archer,Arazzo,ATR_Bonito,ATR_Stingray,ATR_Wahoo,AV_Zircon,Diamond,K50055,Sensation,Victory_7001_CL
        Simulation Gatton2016Base
          Clock: StartDate=2016-04-04; EndDate=2016-12-31
          Summary summaryfile
          Weather: FileName=Gatton.met
          Zone Paddock: Area=1; Slope=0
            Irrigation
            Fertiliser
            SurfaceOrganicMatter: InitialResidueName=wheat_stubble; InitialResidueType=wheat; InitialResidueMass=1000; InitialStandingFraction=0; InitialCPR=0; InitialCNR=80; FractionFaecesAdded=0.5
            Report DailyReport
            Report HarvestReport: EventNames=[Oats].Harvesting
              VariableNames:
                [Canola].Structure.LeafTipsAppeared
                [Canola].Structure.FinalLeafNumber
                [Canola].Phenology.FlagLeafDAS
                [Canola].Phenology.FloweringDAS
                [Canola].Phenology.MaturityDAS
                [Canola].Phenology.CurrentPhaseName
                [Canola].Phenology.CurrentStageName
                [Canola].AboveGroundLive.Wt
                [Canola].AboveGroundLive.Wt
                [Canola].Grain.Wt
            SoluteManager
            Plant Canola: CropType=canola; IsEnding=false; DaysAfterEnding=0
            Soil: Latitude=0; Longitude=0
              InitialWater Initial water: PercentMethod=1; FractionFull=0
              Water
                Thickness  BD   AirDry  LL15  DUL    SAT
                150        1.2  0.1     0.2   0.413  0.453
                150        1.2  0.26    0.28  0.454  0.504
                300        1.2  0.32    0.34  0.495  0.545
                300        1.2  0.3     0.32  0.495  0.545
                300        1.3  0.27    0.29  0.418  0.468
                300        1.3  0.24    0.26  0.406  0.457
                300        1.3  0.31    0.33  0.385  0.435
                SoilCrop CanolaSoil: LL=[0.2, 0.28, 0.34, 0.34, 0.3, 0.35, 0.38]; KL=[0.08, 0.06, 0.04, 0.08, 0.06, 0.04, 0.02]; XF=[1, 1, 1, 1, 1, 1, 1]
              SoilWater: SummerDate=1-Nov; SummerU=6; SummerCona=3.5; WinterDate=1-Apr; WinterU=6; WinterCona=3.5; DiffusConst=40; DiffusSlope=16; Salb=0.13; CN2Bare=75; CNRed=20; CNCov=0.8; max_pond=0; Thickness=[150, 150, 300, 300, 300, 300, 300]; SWCON=[0.3, 0.3, 0.3, 0.3, 0.3, 0.3, 0.3]; ResidueInterception=0
              SoilNitrogen: fom_types=[default, manure, mucuna, lablab, shemp, stable]; fract_carb=[0.2, 0.3, 0.54, 0.57, 0.45, 0]; fract_cell=[0.7, 0.3, 0.37, 0.37, 0.47, 0.1]; fract_lign=[0.1, 0.4, 0.09, 0.06, 0.08, 0.9]
              SoilOrganicMatter: RootCN=33; RootWt=100; SoilCN=14.5; EnrACoeff=7.4; EnrBCoeff=0.2; OCUnits=Total
                Thickness  OC    FBiom  FInert
                150        1     0.05   0.39
                150        0.64  0.02   0.47
                300        0.64  0.015  0.6
                300        0.47  0.01   0.83
                300        0.47  0.01   0.93
                300        0.35  0.01   0.93
                300        0.26  0.01   0.93
              Analysis: Thickness=[150, 150, 300, 300, 300, 300, 300]; PH=[6.5, 6.2, 6.2, 6.3, 6.3, 6.4, 6.5]; PHUnits=Water; BoronUnits=0
              Sample Initial nitrogen: NO3Units=ppm; NH4Units=ppm; SWUnits=Volumetric; OCUnits=Total; PHUnits=Water
                Thickness  NO3  NH4
                150        5    1
                150        2    1
                300        2    1
                300        1    1
                300        1    1
                300        1    1
                300        1    1
              CERESSoilTemperature
            MicroClimate: a_interception=0; b_interception=1; c_interception=0; d_interception=0; soil_albedo=0.23; SoilHeatFluxFraction=0.4; NightInterceptionFraction=0.5; ReferenceHeight=2
            Manager
```csharp
using System;
using Models.Core;
using Models.PMF;
using Models.PMF;
namespace Models
{
    [Serializable]
    [System.Xml.Serialization.XmlInclude(typeof(Model))]
    public class Script : Model
    {
        [Link] Clock Clock;

        [EventSubscribe("Commencing")]
        private void OnSimulationCommencing(object sender, EventArgs e)
        {
            /*
                
                 dateset = 0
                 emer_date = 0
                 endjuv_date = 0
                 anth_date = 0
                 mat_date = 0
                 event = 0
                 cum_temp = 0
                 cum_swdef = 0
                 cum_days = 0
            
            */
        }
        [EventSubscribe("DoManagement")]
        private void OnDoManagement(object sender, EventArgs e)
        {
            /*
                
               if (daysaftersowing = 1) then
                  cum_temp = 0
                  cum_swdef = 0
                  cum_days = 0
               elseif (stagename = 'start_grain_fill' or
                             stagename = 'end_grain_fill' or
                             stagename = 'maturity' or
                             stagename = 'harvest_ripe') then
                  cum_temp = cum_temp + (maxt + mint) / 2
                  cum_swdef = cum_swdef + swdef_photo
                  cum_days = cum_days + 1
               endif
               ! calculate canola oil content
               if (cum_days > 0) then
                  avg_temp = cum_temp / cum_days
                  avg_swdef = cum_swdef / cum_days
                  if (avg_temp <= 14) then
                     oil_conc =  47
                  else
                     oil_conc = (47 - ((avg_temp - 14)*1.21)) - (1.91*(1 - avg_swdef^2))
                  endif
               else
                  oil_conc = 0
               endif
            if (canola.stagename = 'harvest_ripe' or canola.plant_status = 'dead') then
               canola harvest
               canola kill_crop
               canola end_crop
               dateset = 0
            endif
            
            */
        }
    }
}
```
            Manager Harvesting
```csharp
using System;
using Models.Core;
using System.Collections.Generic;
using System.Text;
using Models.Soils;
using Models.PMF;
using Models;
using System.Xml.Serialization;
using APSIM.Shared.Utilities;

namespace Models
{
    [Serializable] 
    public class Script : Model
    {
        [Link] Plant Canola;
        [EventSubscribe("DoManagement")]
        private void OnDoManagement(object sender, EventArgs e)
        {
            if (Canola.Phenology.CurrentPhaseName == "Ripening")
            {
                Canola.Harvest();
                Canola.EndCrop();
            }
        }
    }
}
```
            Manager SowingRule
              SowDate = 24-Jul
              CultivarName = Monty
              SowingDepth = 20
              RowSpacing = 700
              Population = 30
```csharp
using System;
using Models.Core;
using Models.PMF;
using Models.Soils;
using Models.Utilities;
using APSIM.Shared.Utilities;

namespace Models
{
    [Serializable]
    public class Script : Model
    {
        [Link] Clock Clock;
        [Link] Fertiliser Fertiliser;
        [Link] Summary Summary;
        [Link] Soil Soil;
        [Link] Plant Canola;
        Accumulator accumulatedRain;
        
        [Description("Sowing date (d-mmm)")]
        public string SowDate { get; set; }
        [Description("Cultivar to be sown")]
        public string CultivarName { get; set; }
        [Description("Sowing depth (mm)")]
        public double SowingDepth { get; set; }
        [Description("Row spacing (mm)")]
        public double RowSpacing { get; set; }
        [Description("Plant population (/m2)")]
        public double Population { get; set; }
        


        [EventSubscribe("DoManagement")]
        private void OnDoManagement(object sender, EventArgs e)
        {
            if (DateUtilities.WithinDates(SowDate, Clock.Today, SowDate))
            {
                Canola.Sow(population: Population, cultivar: CultivarName, depth: SowingDepth, rowSpacing: RowSpacing);    
            }
        
        }
        
    }
}
```
            Manager Irrigate at Sowing
              Amount = 160
```csharp
using System;
using Models.Core;
using Models.PMF;
namespace Models
{
    [Serializable]
    public class Script : Model
    {
        [Link] Clock Clock;
        [Link] Irrigation Irrigation;
        
  
        [Description("Amount of irrigation to be applied (mm)")]
        public double Amount { get; set; }
        
        [EventSubscribe("Sowing")]
        private void OnSowing(object sender, EventArgs e)
        {                
                Irrigation.Apply(amount: Amount, depth: 0, efficiency: 1, willRunoff: false);
        }
        
    }
}
```
          SoilArbitrator
      Experiment Gatton2017
        Factors
          Factor TOS: Specifications=[SowingRule].Script.SowDate=4-May,6-Jun
          Factor Cv
            Specifications=[SowingRule].Script.CultivarName=Archer,ATR_Wahoo,ATR_Stingray,NS_Diamond,ATR_Bonito
          Factor PP: Specifications=[Weather]
            Weather Natural: FileName=Gatton.met
            Weather 14: FileName=GattonPP14H.met
            Weather 16: FileName=GattonPP16H.met
          Memo
            [SowingRule].Script.CultivarName=Archer,ATR_Wahoo,
            [SowingRule].Script.CultivarName=44Y90_CL,45Y91_CL,Archer,Arazzo,ATR_Bonito,ATR_Stingray,ATR_Wahoo,AV_Zircon,Diamond,K50055,Sensation,Victory_7001_CL
        Simulation Gatton2017Base
          Clock: StartDate=2017-05-04; EndDate=2017-12-31
          Summary summaryfile
          Weather: FileName=Gatton.met
          Zone Paddock: same as Validation.OCPPhenology.Gatton2016.Gatton2016Base.Paddock
          SoilArbitrator
      Experiment Canberra2016
        Factors
          Factor TOS
            Factor 1
              Specifications:
                [SowingRule].Script.SowDate=31-Mar
                [Weather]
              Weather Natural: FileName=Canberra.met
            Factor 2
              Specifications:
                [SowingRule].Script.SowDate=26-Apr
                [Weather]
              Weather Natural: FileName=Canberra.met
              Weather 14: FileName=CanberraPP14H.met
              Weather 16: FileName=CanberraPP16H.met
            Factor 3
              Specifications:
                [SowingRule].Script.SowDate=19-May
                [Weather]
              Weather Natural: FileName=Canberra.met
          Factor Cv
            Specifications=[SowingRule].Script.CultivarName=Archer,ATR_Wahoo,ATR_Stingray,NS_Diamond,Hyola_970_CL,Hyola_971_CL,Oscar,AV_Garnet,ATR_Bonito
          Memo
            [SowingRule].Script.CultivarName=Archer,ATR_Wahoo,
            [SowingRule].Script.CultivarName=44Y90_CL,45Y91_CL,Archer,Arazzo,ATR_Bonito,ATR_Stingray,ATR_Wahoo,AV_Zircon,Diamond,K50055,Sensation,Victory_7001_CL
        Simulation Canberra2016Base
          Clock: StartDate=2016-03-30; EndDate=2016-12-31
          Summary summaryfile
          Weather: FileName=Canberra.met
          Zone Paddock: same as Validation.OCPPhenology.Gatton2016.Gatton2016Base.Paddock
          SoilArbitrator
      Experiment Canberra2017
        Factors
          Factor TOS: Specifications=[SowingRule].Script.SowDate=18-Apr,15-May
          Factor Cv
            Specifications=[SowingRule].Script.CultivarName=Archer,ATR_Wahoo,ATR_Stingray,NS_Diamond,ATR_Bonito
          Factor PP: Specifications=[Weather]
            Weather Natural: FileName=Canberra.met
            Weather 14: FileName=CanberraPP14H.met
            Weather 16: FileName=CanberraPP16H.met
          Memo
            [SowingRule].Script.CultivarName=Archer,ATR_Wahoo,
            [SowingRule].Script.CultivarName=44Y90_CL,45Y91_CL,Archer,Arazzo,ATR_Bonito,ATR_Stingray,ATR_Wahoo,AV_Zircon,Diamond,K50055,Sensation,Victory_7001_CL
        Simulation Canberra2017Base
          Clock: StartDate=2017-04-17; EndDate=2017-12-31
          Summary summaryfile
          Weather: FileName=Canberra.met
          Zone Paddock: same as Validation.OCPPhenology.Gatton2016.Gatton2016Base.Paddock
          SoilArbitrator
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