Simulations: Version=2
  Memo TitlePage
    # The APSIM Chickpea Model

    _Andreucci M. P. , Whish, J., Huth, N.I. and Holzworth, D.P._
  Memo Introduction
    The APSIM wheat model has been developed using the Plant Modelling Framework (PMF) of [brown_plant_2014]. This new framework provides a library of plant organ and process submodels that can be coupled, at runtime, to construct a model in much the same way that models can be coupled to construct a simulation. This means that dynamic composition of lower level process and organ classes (e.g. photosynthesis, leaf) into larger constructions (e.g. maize, wheat, sorghum) can be achieved by the model developer without additional coding.

    The model consists of:

    * a phenology model to simulate development between growth phases
    * a structure model to simulate plant morphology
    * a collection of organs to simulate the various plant parts
    * an arbitrator to allocate resources (N, biomass) to the various plant organs
  Replacements
    Report HarvestReport: EventNames=[Chickpea].Harvesting
      VariableNames:
        [Clock].Today
        [Chickpea].Phenology.CurrentStageName as Stage
        [Chickpea].Phenology.FloweringDAS.Value as FloweringDAS
        [Chickpea].Phenology.MaturityDAS.Value as MaturityDAS
        [Chickpea].Grain.Live.Wt as GrainWt
        [Chickpea].AboveGround.Wt
        [Chickpea].Phenology.FinalNodeNo.Value
        [Chickpea].Grain.NumberFunction.Value
        [Chickpea].Shell.PodNumber.Value
        [Chickpea].Grain.Size
        [Chickpea].Phenology.EmergenceDAS.Value as EmergenceDAS
    Report: EventNames=[Clock].DoReport
      VariableNames:
        [Clock].Today
        [Soil].SoilWater.SW
        [Soil].SoilWater.Eo
        [Soil].SoilWater.Es
        [Soil].SoilWater.Drainage
        [Soil].SoilWater.Runoff
        [Soil].SoilWater.pond
        sum([Soil].SoilWater.SWmm) as ProfileWater
        [Soil].NO3N
        [MicroClimate].net_radn
        [MicroClimate].peta
        [MicroClimate].petr
        [Chickpea].Leaf.LAI
        [Chickpea].Leaf.Fn
        [Chickpea].Leaf.Fw
        [Chickpea].Structure.MainStemNodeNo
        [Chickpea].Structure.PlantTotalNodeNo
        [Chickpea].Leaf.SenescingCohortNo
        [Chickpea].Structure.TotalStemPopn
        [Chickpea].AboveGround.Wt
        [Chickpea].Leaf.Live.Wt
        [Chickpea].Leaf.Live.NConc
        [Chickpea].Stem.Live.Wt
        [Chickpea].Leaf.SpecificArea
        [Chickpea].Shell.Live.Wt
        [Chickpea].Grain.Live.Wt
        [Chickpea].Grain.NumberFunction.Value
        [Chickpea].Shell.PodNumber.Value
        [Chickpea].Nodule.NFixed
        [Chickpea].Nodule.Live.Wt
        [Chickpea].Arbitrator.DMNutrientLimitation
        [Chickpea].Arbitrator.DMSinkLimitation
        [Chickpea].Arbitrator.NDemand
        [Chickpea].Arbitrator.NSupply
        [Chickpea].Arbitrator.DMDemand
        [Chickpea].Arbitrator.DMSupply
        [Chickpea].Leaf.Live.MetabolicNConc
        [Chickpea].Leaf.Live.StructuralNConc
        [Chickpea].Leaf.Live.NonStructuralNConc
        [Chickpea].Leaf.SenescingCohortNo
        [Chickpea].Stem.DMDemand
        [Chickpea].Leaf.DMSupplyPhotosynthesis
    Plant Chickpea: CropType=Chickpea
      Memo Introduction
        The APSIM Chickpea model has been developed from the original APSIM Chickpea model described by Robertson et al(2002) using the Plant Modelling Framework of Brown et al (2014).
      OrganArbitrator Arbitrator: NArbitrationOption=RelativeAllocation; DMArbitrationOption=RelativeAllocation
      Phenology
        AirTemperatureFunction ThermalTime
          Memo
            The cardinal temperatures for calculating thermal time have been taken from Singh and Virmani (1996) as used by Robertson et al (2002).
          XYPairs: X=[0, 30, 40]; Y=[0, 30, 0]
        PhotoperiodFunction Photoperiod: Twilight=-6
        GerminatingPhase Germinating: Start=Sowing; End=Germination
        EmergingPhase Emerging: Start=Germination; End=Emergence; ShootLag=100; ShootRate=0.7
          VariableReference ThermalTime: VariableName=[Phenology].ThermalTime.Value
        GenericPhase Vegetative: Start=Emergence; End=StartFlowering
          Constant Target: Value=500
          VariableReference ThermalTime: VariableName=[Phenology].ThermalTime.Value
          VariableReference Stress: VariableName=[Phenology].Vegetative.PhotoperiodEffect.PhotoperiodEffect
          QualitativePPEffect PhotoperiodEffect: OptimumPhotoperiod=21; CriticalPhotoperiod=9
            VariableReference Photoperiod: VariableName=[Phenology].Photoperiod.Value
        GenericPhase Flowering: Start=StartFlowering; End=EndFlowering
          Memo
            The duration of the grain filling phase has been taken from the model of Robertson et al (2002).
          VariableReference ThermalTime: VariableName=[Phenology].ThermalTime.Value
          MultiplyFunction Target
            Constant NumberOfFloweringNodes: Value=5
            VariableReference Phyllochron: VariableName=[Structure].NodeAppearanceRate.Value
        GenericPhase GrainFilling: Start=EndFlowering; End=EndGrainFill
          Memo
            The duration of the grain filling phase has been taken from the model of Robertson et al (2002).
          Constant Target: Value=690
          VariableReference ThermalTime: VariableName=[Phenology].ThermalTime.Value
        GenericPhase Maturing: Start=EndGrainFill; End=Maturity
          Memo
            The duration of the Maturing phase has been taken from the model of Robertson et al (2002).
          Constant Target: Value=60
          VariableReference ThermalTime: VariableName=[Phenology].ThermalTime.Value
        GenericPhase Ripening: Start=Maturity; End=HarvestRipe
          Constant Target: Value=1
          VariableReference ThermalTime: VariableName=[Phenology].ThermalTime.Value
        EndPhase ReadyForHarvesting: Start=HarvestRipe; End=Unused
          VariableReference ThermalTime: VariableName=[Phenology].ThermalTime.Value
        OnEventFunction FloweringDAS: SetEvent=StartFlowering; ReSetEvent=never
          Memo
            A function is used to provide flowering date as days after sowing(DAS).
          Constant PreEventValue: Value=0
          VariableReference PostEventValue: VariableName=[Phenology].DaysAfterSowing
        OnEventFunction MaturityDAS: SetEvent=Maturity; ReSetEvent=never
          Memo
            A function is used to provide maturity date as days after sowing(DAS).
          Constant PreEventValue: Value=0
          VariableReference PostEventValue: VariableName=[Phenology].DaysAfterSowing
        OnEventFunction EmergenceDAS: SetEvent=Emergence; ReSetEvent=never
          Memo
            A function is used to provide maturity date as days after sowing(DAS).
          Constant PreEventValue: Value=0
          VariableReference PostEventValue: VariableName=[Phenology].DaysAfterSowing
      Structure: InitialiseStage=Emergence; PrimaryBudNo=0
        VariableReference ThermalTime: VariableName=[Phenology].ThermalTime.Value
        Constant DroughtInducedBranchMortality: Value=0
        Constant HeightModel: Value=1
        Constant MainStemFinalNodeNumber: Value=40
        LinearInterpolationFunction Height: XProperty=[Stem].Live.Wt
          XYPairs: X=[0, 300]; Y=[10, 750]
        MultiplyFunction BranchingRate
          LinearInterpolationFunction Potential_Branching_Rate: XProperty=[Structure].MainStemNodeNo
            XYPairs: X=[0, 6, 8, 10, 20, 31]; Y=[0, 0, 1, 2, 0, 0]
          LinearInterpolationFunction Cover_response: XProperty=[leaf].CoverGreen
            XYPairs: X=[0, 0.2, 0.3]; Y=[1, 1, 0]
          LinearInterpolationFunction CHO_response: XProperty=[Stem].Live.NonStructuralWt
            XYPairs: X=[0, 1, 10]; Y=[1, 1, 1]
        Constant BranchMortality: Value=0
        VariableReference MainStemPrimordiaInitiationRate: VariableName=[Structure].MainStemNodeAppearanceRate.Value
        PhaseLookup MainStemNodeAppearanceRate
          PhaseLookupValue PreEmergence: Start=Germination; End=Emergence
            Constant Function: Value=0
          PhaseLookupValue CanopyDevelopment: Start=Emergence; End=EndFlowering
            VariableReference NodeAppearanceRate: VariableName=[Structure].NodeAppearanceRate.Value
          PhaseLookupValue Reproductive: Start=EndFlowering; End=Maturity
            Constant Function: Value=0
        LinearInterpolationFunction NodeAppearanceRate: XProperty=[Structure].MainStemNodeNo
          XYPairs: X=[1, 2, 3, 4, 30]; Y=[20, 20, 20, 50, 50]
      HIReproductiveOrgan Grain
        Constant WaterContent: Value=0.12
        Constant NConc: Value=0.02
        VariableReference AboveGroundWt: VariableName=[AboveGround].Wt
        Biomass Live
        Biomass Dead
        Folder BiomassRemovalDefaults
          OrganBiomassRemovalType Harvest: FractionRemoved=1; FractionToResidue=0
          OrganBiomassRemovalType Cut: FractionRemoved=1; FractionToResidue=0
          OrganBiomassRemovalType Prune: FractionRemoved=0; FractionToResidue=0.8
          OrganBiomassRemovalType Graze: FractionRemoved=0.6; FractionToResidue=0.2
          OrganBiomassRemovalType Thin: FractionRemoved=0; FractionToResidue=0.05
        PhaseLookup HIIncrement
          PhaseLookupValue Vegetative: Start=Emergence; End=EndFlowering
            Constant Function: Value=0
          PhaseLookupValue Reproductive: Start=EndFlowering; End=EndGrainFill
            MultiplyFunction HIIncrement
              DivideFunction IncrementPerDegreeDay
                Constant PotentialHarvestIndex: Value=0.6
                VariableReference GrainFillingDuration: VariableName=[Phenology].GrainFilling.Target.Value
              VariableReference ThermalTime: VariableName=[Phenology].ThermalTime.Value
          PhaseLookupValue Ripening: Start=EndGrainFill; End=HarvestRipe
            Constant Function: Value=0
      Root: InitialDM=0.2; SpecificRootLength=40000; NuptakeSupply=0
        CompositeBiomass Live: Propertys=[[Root].LayerLive]
        CompositeBiomass Dead: Propertys=[[Root].LayerDead]
        LinearInterpolationFunction KLModifier: XProperty=[Leaf].LAI
          XYPairs: X=[0, 3]; Y=[1, 1]
        AirTemperatureFunction TemperatureEffect
          XYPairs: X=[0, 26, 35]; Y=[1, 1, 1]
        Constant MaxDailyNUptake: Value=6
        Constant SenescenceRate: Value=0.005
        PhaseLookup RootFrontVelocity
          PhaseLookupValue PreEmergence: Start=Germination; End=Emergence
            Constant Function: Value=3
          PhaseLookupValue early: Start=Emergence; End=StartFlowering
            Constant Function: Value=15
          PhaseLookupValue late: Start=StartFlowering; End=Maturity
            Constant Function: Value=17
        PhaseLookup PartitionFraction
          PhaseLookupValue Early: Start=Emergence; End=StartFlowering
            Constant Function: Value=0.2
          PhaseLookupValue Middle: Start=StartFlowering; End=EndFlowering
            Constant Function: Value=0.1
          PhaseLookupValue Late: Start=EndFlowering; End=Maturity
            Constant Function: Value=0
        Constant MaximumNConc: Value=0.01
        Constant MinimumNConc: Value=0.005
        PhaseBasedSwitch NitrogenDemandSwitch: Start=Emergence; End=EndGrainFill
        Folder BiomassRemovalDefaults
          OrganBiomassRemovalType Harvest: FractionRemoved=0; FractionToResidue=0.2
          OrganBiomassRemovalType Cut: FractionRemoved=0; FractionToResidue=0.3
          OrganBiomassRemovalType Prune: FractionRemoved=0; FractionToResidue=0.1
          OrganBiomassRemovalType Graze: FractionRemoved=0; FractionToResidue=0.15
        LinearInterpolationFunction KNO3: XProperty=[Root].RootLengthDenisty
          XYPairs: X=[0, 0.003]; Y=[0.02, 0.02]
        LinearInterpolationFunction KNH4: XProperty=[Root].RootLengthDenisty
          XYPairs: X=[0, 0.003]; Y=[0, 0]
        LinearInterpolationFunction NUptakeSWFactor: XProperty=[Root].RWC
          XYPairs: X=[0, 1]; Y=[0, 1]
      GenericAboveGroundOrgan Shell
        Biomass Live
        Biomass Dead
        Constant NReallocationFactor: Value=0
        Constant NRetranslocationFactor: Value=0.1
        Constant StructuralFraction: Value=0.7
        Constant MaximumNConc: Value=0.02
        Constant MinimumNConc: Value=0.007
        Constant DMRetranslocationFactor: Value=0.1
        PhaseBasedSwitch NitrogenDemandSwitch: Start=Germination; End=Maturity
        PopulationBasedDemandFunction DMDemandFunction
          VariableReference ThermalTime: VariableName=[Phenology].ThermalTime.Value
          VariableReference OrganPopulation: VariableName=[Shell].PodNumber.Value
          Constant ExpansionStress: Value=1
          AddFunction GrowthDuration
            VariableReference FloweringGrowthPeriod: VariableName=[Phenology].Flowering.Target.Value
            Constant PostFloweringGrowthPeriod: Value=60
          Constant StartStage: Value=4
          Constant MaximumOrganWt: Value=0.05
        MultiplyFunction PodNumber
          Constant PodsPerNode: Value=1
          VariableReference StemPopulation: VariableName=[Structure].TotalStemPopn
          VariableReference FloweringNodes: VariableName=[Phenology].Flowering.Target.NumberOfFloweringNodes.Value
        Folder BiomassRemovalDefaults
          OrganBiomassRemovalType Harvest: FractionRemoved=0.5; FractionToResidue=0.1
          OrganBiomassRemovalType Cut: FractionRemoved=0.8; FractionToResidue=0
          OrganBiomassRemovalType Prune: FractionRemoved=0; FractionToResidue=0.6
          OrganBiomassRemovalType Graze: FractionRemoved=0.6; FractionToResidue=0.2
      Leaf: CurrentExpandingLeaf=0; StartFractionExpanded=0; FractionNextleafExpanded=0; _ExpandedNodeNo=0; DeadNodesYesterday=0; MaxCover=1; Albedo=0.2; Gsmax=0.012; R50=200; FRGR=0; PotentialEP=0; KDead=0.3; MaximumMainStemLeafNumber=40; FractionDied=0
        CompositeBiomass Live: Propertys=[[Leaf].CohortLive]
        CompositeBiomass Dead: Propertys=[[Leaf].CohortDead]
        ArrayBiomass CohortArrayLive: Propertys=[[Leaf].Live]; ArraySize=[Leaf].MaxNodeNo
        ArrayBiomass CohortArrayDead: Propertys=[[Leaf].Dead]; ArraySize=[Leaf].MaxNodeNo
        LeafCohort InitialLeaf1: Rank=1; Area=224
        LeafCohort InitialLeaf2: Rank=2; Area=224
        LeafCohort InitialLeaf3: Rank=3; Area=0
        VariableReference ThermalTime: VariableName=[Phenology].ThermalTime.Value
        LeafCohortParameters
          Constant SenessingLeafRelativeSize: Value=1; Units=0-1
          LinearInterpolationFunction MaxAreaOLD: XProperty=[Structure].MainStemNodeNo
            Memo
              Robertson et al (2002) used a maximum leaf size of 300 mm2 for the first 9 leaves and 600 mm2 thereafter.
            XYPairs: X=[1, 12, 16, 19]; Y=[300, 300, 450, 850]
          LinearInterpolationFunction MaxArea: XProperty=[Structure].MainStemNodeNo
            Memo
              Robertson et al (2002) used a maximum leaf size of 300 mm2 for the first 9 leaves and 600 mm2 thereafter.
            XYPairs: X=[1, 5, 10, 21]; Y=[224, 224, 489, 1080]
          MultiplyFunction GrowthDuration
            Constant Multiplier: Value=4
            VariableReference Phyllochron: VariableName=[Structure].MainStemNodeAppearanceRate.Value
          MultiplyFunction LagDuration
            Constant Multiplier: Value=18
            VariableReference Phyllochron: VariableName=[Structure].MainStemNodeAppearanceRate.Value
          MultiplyFunction SenescenceDuration
            Constant Multiplier: Value=2
            VariableReference Phyllochron: VariableName=[Structure].MainStemNodeAppearanceRate.Value
          Constant DetachmentLagDuration: Value=1
          Constant DetachmentDuration: Value=46
          LinearInterpolationFunction SpecificLeafAreaMax: XProperty=[Leaf].LAI
            Memo
              Maximum specific leaf area has been taken from Robertson et al (2002).
            XYPairs: X=[0, 3]; Y=[22000, 15000]
          Constant StructuralFraction: Value=0.7
          LinearInterpolationFunction SpecificLeafAreaMin: XProperty=[Leaf].LAI
            XYPairs: X=[0, 3]; Y=[20000, 14000]
          LinearInterpolationFunction ExpansionStress: XProperty=[Chickpea].WaterSupplyDemandRatio
            XYPairs: X=[0, 1]; Y=[0, 1]
          Constant MinimumNConc: Value=0.02
          Constant CriticalNConc: Value=0.05
          Constant MaximumNConc: Value=0.08
          Constant NReallocationFactor: Value=0.3
          Constant NRetranslocationFactor: Value=0.1
          Constant DMRetranslocationFactor: Value=0
          LinearInterpolationFunction ShadeInducedSenescenceRate: XProperty=[Leaf].CohortCurrentRankCoverAbove
            XYPairs: X=[0, 0.5, 0.9, 0.99]; Y=[0, 1, 1, 1]
          Constant InitialNConc: Value=0.08
          Constant NonStructuralFraction: Value=0
        LinearInterpolationFunction ExtinctionCoeff: XProperty=[Chickpea].SowingData.RowSpacing
          XYPairs: X=[200, 350, 1000]; Y=[0.7, 0.65, 0.45]
        RUEModel Photosynthesis
          Constant RUE: Value=1.25
          WeightedTemperatureFunction FT: MaximumTemperatureWeighting=0.75
            XYPairs: X=[0, 15, 30, 40]; Y=[0, 1, 1, 0]
          LinearInterpolationFunction FVPD: XProperty=[Leaf].Photosynthesis.VPD
            XYPairs: X=[0, 10, 50]; Y=[1, 1, 1]
          LinearInterpolationFunction FN: XProperty=[Leaf].Fn
            XYPairs: X=[0, 1, 1.5]; Y=[0, 1, 1]
          LinearInterpolationFunction FW: XProperty=[Leaf].Fw
            XYPairs: X=[0, 1, 1.5]; Y=[0, 1, 1]
          RUECO2Function FCO2: PhotosyntheticPathway=C3
          Memo
            Ayaz eta 2004 presented a RUE of 1.6 g/MJ PAR during non-limiting temperature conditions for field pea.  Halving this to make it total radiation gives 0.8 g/MJ and adding 20% to account for root and  nodule production and N fixiation costs gives 1.0 g/MJ
          VariableReference RadnInt: VariableName=[Leaf].RadIntTot
        LinearInterpolationFunction FrostFraction: XProperty=[Weather].MinT
          XYPairs: X=[-1, 0]; Y=[0, 0]
        MinimumFunction FRGRFunction
          VariableReference RUE_FT: VariableName=[Leaf].Photosynthesis.FT.Value
          MinimumFunction Others
            VariableReference RUE_FN: VariableName=[Leaf].Photosynthesis.FN.Value
            VariableReference RUE_FVPD: VariableName=[Leaf].Photosynthesis.FVPD.Value
        Folder BiomassRemovalDefaults
          OrganBiomassRemovalType Harvest: FractionRemoved=0; FractionToResidue=0.3
          OrganBiomassRemovalType Cut: FractionRemoved=0.8; FractionToResidue=0
          OrganBiomassRemovalType Prune: FractionRemoved=0; FractionToResidue=0.6
          OrganBiomassRemovalType Graze: FractionRemoved=0.6; FractionToResidue=0.1
      GenericAboveGroundOrgan Stem
        Biomass Live
        Biomass Dead
        Constant NReallocationFactor: Value=0
        Constant NRetranslocationFactor: Value=0.1
        Constant DMRetranslocationFactor: Value=0.1
        Constant MaximumNConc: Value=0.02
        Constant MinimumNConc: Value=0.007
        PhaseBasedSwitch NitrogenDemandSwitch: Start=Emergence; End=EndGrainFill
        Constant StructuralFraction: Value=1
        Folder BiomassRemovalDefaults: same as Replacements.Chickpea.Shell.BiomassRemovalDefaults
        PartitionFractionDemandFunction DMDemandFunction
          PhaseLookup PartitionFraction
            PhaseLookupValue StemGrowthPhase: Start=Emergence; End=EndFlowering
              LinearInterpolationFunction StemFraction: XProperty=[AboveGround].Wt
                XYPairs: X=[0, 200, 201, 400]; Y=[0.4, 0.4, 0.6, 0.6]
            PhaseLookupValue GrainFilling: Start=EndFlowering; End=EndGrainFill
              Constant StemFraction: Value=0
      Nodule: NFixationOption=Majic
        Biomass Live
        Biomass Dead
        Constant SpecificNitrogenaseActivity: Value=0
        Constant FixationMetabolicCost: Value=0
        AirTemperatureFunction FT
          XYPairs: X=[0, 20, 30, 40]; Y=[0, 1, 1, 0]
        LinearInterpolationFunction FW: XProperty=[Leaf].Fw
          XYPairs: X=[0, 1, 1.5]; Y=[0, 1, 1]
        LinearInterpolationFunction FWlog: XProperty=[Leaf].Fw
          XYPairs: X=[0, 1, 1.5]; Y=[1, 1, 1]
        PartitionFractionDemandFunction DMDemandFunction
          PhaseLookup PartitionFraction
            PhaseLookupValue Early: Start=Emergence; End=StartFlowering
              Constant Function: Value=0
            PhaseLookupValue Middle: Start=StartFlowering; End=EndFlowering
              Constant Function: Value=0
            PhaseLookupValue Late: Start=EndFlowering; End=Maturity
              Constant Function: Value=0
        Constant MaximumNConc: Value=0.02
        Constant MinimumNConc: Value=0.01
        Constant SenescenceRate: Value=0
        PhaseBasedSwitch NitrogenDemandSwitch: Start=Emergence; End=EndGrainFill
        Folder BiomassRemovalDefaults
          OrganBiomassRemovalType Harvest: FractionRemoved=0; FractionToResidue=0
          OrganBiomassRemovalType Cut: FractionRemoved=0; FractionToResidue=0
          OrganBiomassRemovalType Prune: FractionRemoved=0; FractionToResidue=0
          OrganBiomassRemovalType Graze: FractionRemoved=0; FractionToResidue=0
      CompositeBiomass AboveGround
        Propertys=[[Leaf].Live, [Leaf].Dead, [Stem].Live, [Stem].Dead, [Grain].Live, [Grain].Dead, [Shell].Live, [Shell].Dead]
      CompositeBiomass BelowGround: Propertys=[[Root].Live, [Root].Dead, [Nodule].Live, [Nodule].Dead]
      CompositeBiomass Total
        Propertys=[[Leaf].Live, [Leaf].Dead, [Stem].Live, [Stem].Dead, [Grain].Live, [Grain].Dead, [Shell].Live, [Shell].Dead, [Root].Live, [Root].Dead, [Nodule].Live, [Nodule].Dead]
      CompositeBiomass TotalLive
        Propertys=[[Leaf].Live, [Stem].Live, [Grain].Live, [Shell].Live, [Root].Live, [Nodule].Live]
      CompositeBiomass TotalDead
        Propertys=[[Leaf].Dead, [Stem].Dead, [Grain].Dead, [Shell].Dead, [Root].Dead, [Nodule].Dead]
      CompositeBiomass Pod: Propertys=[[Shell].Live, [Shell].Dead, [Grain].Live, [Grain].Dead]
      Memo References
        References

        Brown, H.E., Huth, N.I., Holzworth, D.P., Teixeira, E.I., Zyskowski, R.F., Hargreaves, J.N., Moot, D.J., 2014\. Plant modelling framework: software for building and running crop models on the APSIM platform. Environmental Modelling & Software 62 385-398.

        Robertson, M.J., Carberry, P.S., Huth, N.I., Turpin, J.E., Probert, M.E., Poulton, P.L., Bell, M., Wright, G.C., Yeates, S.J., Brinsmead, R.B., 2002\. Simulation of growth and development of diverse legume species in APSIM. Australian Journal of Agricultural Research 53 429-446.

        Singh P, Virmani SM (1996) Modeling growth and yield of chickpea (Cicer arietinum L.). Field Crops Research , 46, 41-59.
      Cultivar Amethyst
        Command:
          [Phenology].Vegetative.Target.Value = 420
          [Phenology].Vegetative.PhotoperiodEffect.CriticalPhotoperiod =9.5
          [Grain].HIIncrement.Reproductive.HIIncrement.IncrementPerDegreeDay.PotentialHarvestIndex.Value = 0.5
      Cultivar Hashem
        Command:
          [Leaf].LeafCohortParameters.MaxArea.XYPairs.X = 1,  5,  10,  21
          [Leaf].LeafCohortParameters.MaxArea.XYPairs.Y = 224,  224,  489, 1080
          [Phenology].Vegetative.Target.Value = 550
          [Phenology].Vegetative.PhotoperiodEffect.CriticalPhotoperiod = 10.5
          [Grain].HIIncrement.Reproductive.HIIncrement.IncrementPerDegreeDay.PotentialHarvestIndex.Value = 0.5
      Cultivar Ayaz: same as Replacements.Chickpea.Hashem
      Cultivar Ghab3
        Command:
          [Leaf].LeafCohortParameters.MaxArea.XYPairs.X = 1,  5,  10,  21
          [Leaf].LeafCohortParameters.MaxArea.XYPairs.Y = 224,  224,  489, 1080
          [Phenology].Vegetative.Target.Value = 510
          [Phenology].Vegetative.PhotoperiodEffect.CriticalPhotoperiod = 10.5
          [Grain].HIIncrement.Reproductive.HIIncrement.IncrementPerDegreeDay.PotentialHarvestIndex.Value = 0.5
      Cultivar Ghab5
        Command:
          [Leaf].LeafCohortParameters.MaxArea.XYPairs.X = 1,  5,  10,  21
          [Leaf].LeafCohortParameters.MaxArea.XYPairs.Y = 224,  224,  489, 1080
          [Phenology].Vegetative.Target.Value = 500
          [Phenology].Vegetative.PhotoperiodEffect.CriticalPhotoperiod = 10.5
          [Grain].HIIncrement.Reproductive.HIIncrement.IncrementPerDegreeDay.PotentialHarvestIndex.Value = 0.5
      Cultivar Ghab4: same as Replacements.Chickpea.Ghab5
      Cultivar 00_21C: same as Replacements.Chickpea.Ghab5
      Cultivar 00_40C
        Command:
          [Leaf].LeafCohortParameters.MaxArea.XYPairs.X = 1,  5,  10,  21
          [Leaf].LeafCohortParameters.MaxArea.XYPairs.Y = 224,  224,  489, 1080
          [Phenology].Vegetative.Target.Value = 430
          [Phenology].Vegetative.PhotoperiodEffect.CriticalPhotoperiod = 10
          [Grain].HIIncrement.Reproductive.HIIncrement.IncrementPerDegreeDay.PotentialHarvestIndex.Value = 0.5
      Cultivar 01_36C
        Command:
          [Leaf].LeafCohortParameters.MaxArea.XYPairs.X = 1,  5,  10,  21
          [Leaf].LeafCohortParameters.MaxArea.XYPairs.Y = 224,  224,  489, 1080
          [Phenology].Vegetative.Target.Value = 600
          [Phenology].Vegetative.PhotoperiodEffect.CriticalPhotoperiod = 10
          [Grain].HIIncrement.Reproductive.HIIncrement.IncrementPerDegreeDay.PotentialHarvestIndex.Value = 0.5
      Cultivar 01_61C: same as Replacements.Chickpea.Ghab5
      Cultivar 01_7C
        Command:
          [Leaf].LeafCohortParameters.MaxArea.XYPairs.X = 1,  5,  10,  21
          [Leaf].LeafCohortParameters.MaxArea.XYPairs.Y = 224,  224,  489, 1080
          [Phenology].Vegetative.Target.Value = 485
          [Phenology].Vegetative.PhotoperiodEffect.CriticalPhotoperiod = 10.5
          [Grain].HIIncrement.Reproductive.HIIncrement.IncrementPerDegreeDay.PotentialHarvestIndex.Value = 0.5
      Cultivar 02_03C: same as Replacements.Chickpea.Ghab5
      Cultivar 02_10C: same as Replacements.Chickpea.Ghab5
      Cultivar 02_23C
        Command:
          [Leaf].LeafCohortParameters.MaxArea.XYPairs.X = 1,  5,  10,  21
          [Leaf].LeafCohortParameters.MaxArea.XYPairs.Y = 224,  224,  489, 1080
          [Phenology].Vegetative.Target.Value = 400
          [Phenology].Vegetative.PhotoperiodEffect.CriticalPhotoperiod = 11
          [Grain].HIIncrement.Reproductive.HIIncrement.IncrementPerDegreeDay.PotentialHarvestIndex.Value = 0.5
      Cultivar 02_30C: same as Replacements.Chickpea.02_23C
      Cultivar 02_35C
        Command:
          [Leaf].LeafCohortParameters.MaxArea.XYPairs.X = 1,  5,  10,  21
          [Leaf].LeafCohortParameters.MaxArea.XYPairs.Y = 224,  224,  489, 1080
          [Phenology].Vegetative.Target.Value = 505
          [Phenology].Vegetative.PhotoperiodEffect.CriticalPhotoperiod = 10.5
          [Grain].HIIncrement.Reproductive.HIIncrement.IncrementPerDegreeDay.PotentialHarvestIndex.Value = 0.5
      Cultivar 97_116C
        Command:
          [Leaf].LeafCohortParameters.MaxArea.XYPairs.X = 1,  5,  10,  21
          [Leaf].LeafCohortParameters.MaxArea.XYPairs.Y = 224,  224,  489, 1080
          [Phenology].Vegetative.Target.Value = 405
          [Phenology].Vegetative.PhotoperiodEffect.CriticalPhotoperiod = 10.5
          [Grain].HIIncrement.Reproductive.HIIncrement.IncrementPerDegreeDay.PotentialHarvestIndex.Value = 0.5
      Cultivar 97_118C
        Command:
          [Leaf].LeafCohortParameters.MaxArea.XYPairs.X = 1,  5,  10,  21
          [Leaf].LeafCohortParameters.MaxArea.XYPairs.Y = 224,  224,  489, 1080
          [Phenology].Vegetative.Target.Value = 420
          [Phenology].Vegetative.PhotoperiodEffect.CriticalPhotoperiod = 10.5
          [Grain].HIIncrement.Reproductive.HIIncrement.IncrementPerDegreeDay.PotentialHarvestIndex.Value = 0.5
      Cultivar 97_120C: same as Replacements.Chickpea.02_23C
      Cultivar 97_219C
        Command:
          [Leaf].LeafCohortParameters.MaxArea.XYPairs.X = 1,  5,  10,  21
          [Leaf].LeafCohortParameters.MaxArea.XYPairs.Y = 224,  224,  489, 1080
          [Phenology].Vegetative.Target.Value = 430
          [Phenology].Vegetative.PhotoperiodEffect.CriticalPhotoperiod = 11
          [Grain].HIIncrement.Reproductive.HIIncrement.IncrementPerDegreeDay.PotentialHarvestIndex.Value = 0.5
      Cultivar 98_106C: same as Replacements.Chickpea.02_23C
      Cultivar 98_107C
        Command:
          [Leaf].LeafCohortParameters.MaxArea.XYPairs.X = 1,  5,  10,  21
          [Leaf].LeafCohortParameters.MaxArea.XYPairs.Y = 224,  224,  489, 1080
          [Phenology].Vegetative.Target.Value = 410
          [Phenology].Vegetative.PhotoperiodEffect.CriticalPhotoperiod = 11
          [Grain].HIIncrement.Reproductive.HIIncrement.IncrementPerDegreeDay.PotentialHarvestIndex.Value = 0.5
      Cultivar 98_16C: same as Replacements.Chickpea.00_40C
      Cultivar 98_55C: same as Replacements.Chickpea.98_107C
      Cultivar 98_79C: same as Replacements.Chickpea.98_107C
      Cultivar 99_34C
        Command:
          [Leaf].LeafCohortParameters.MaxArea.XYPairs.X = 1,  5,  10,  21
          [Leaf].LeafCohortParameters.MaxArea.XYPairs.Y = 224,  224,  489, 1080
          [Phenology].Vegetative.Target.Value = 420
          [Phenology].Vegetative.PhotoperiodEffect.CriticalPhotoperiod = 11
          [Grain].HIIncrement.Reproductive.HIIncrement.IncrementPerDegreeDay.PotentialHarvestIndex.Value = 0.5
      Cultivar 99_66C: same as Replacements.Chickpea.98_107C
      Cultivar 99_73C
        Command:
          [Leaf].LeafCohortParameters.MaxArea.XYPairs.X = 1,  5,  10,  21
          [Leaf].LeafCohortParameters.MaxArea.XYPairs.Y = 224,  224,  489, 1080
          [Phenology].Vegetative.Target.Value = 440
          [Phenology].Vegetative.PhotoperiodEffect.CriticalPhotoperiod = 11
          [Grain].HIIncrement.Reproductive.HIIncrement.IncrementPerDegreeDay.PotentialHarvestIndex.Value = 0.5
      Cultivar Anwar
        Command:
          [Leaf].LeafCohortParameters.MaxArea.XYPairs.X = 1,  5,  10,  21
          [Leaf].LeafCohortParameters.MaxArea.XYPairs.Y = 224,  224,  489, 1080
          [Phenology].Vegetative.Target.Value = 490
          [Phenology].Vegetative.PhotoperiodEffect.CriticalPhotoperiod = 11
          [Grain].HIIncrement.Reproductive.HIIncrement.IncrementPerDegreeDay.PotentialHarvestIndex.Value = 0.5
  DataStore
    ExcelInput Observed: FileName=Observed.xlsx; SheetNames=[ObservedHarvestData]
    ExcelInput ObservedTimeseries: FileName=Observed.xlsx; SheetNames=[ObservedTimeseriesData]
    PredictedObserved: PredictedTableName=HarvestReport; ObservedTableName=ObservedHarvestData; FieldNameUsedForMatch=Stage
      Tests: POName=PredictedObserved
        AcceptedStats:
          Name                            n    Slope     Intercept  SEslope    SEintercept  R2        RMSE     NSE       ME        MAE      RSR
          Chickpea.AboveGround.Wt         76   1.06729   64.12      0.0978513  77.2186      0.616519  258.347  0.114871  113.904   201.775  0.934603
          Chickpea.Shell.PodNumber.Value  11   0.448013  907.786    0.123148   428.594      0.595235  1498.16  0.455538  -652.518  1221.7   0.703538
          EmergenceDAS                    64   0.569305  5.30781    0.0420386  0.476532     0.747349  1.9435   0.668172  0.646875  1.30938  0.571527
          FloweringDAS                    272  1.1339    -8.06017   0.0200541  2.2584       0.922124  14.9466  0.848015  6.11871   10.738   0.389136
          GrainWt                         314  0.583972  169.565    0.0964896  20.9143      0.105066  214.207  -2.77283  91.9346   159.415  1.93928
          MaturityDAS                     210  0.869448  24.8293    0.0164331  2.69623      0.930835  13.9425  0.918757  4.38333   12.3149  0.284353
        AcceptedStatsName=Name n Slope Intercept SEslope SEintercept R2 RMSE NSE ME MAE RSR
    ExcelInput ObservedLawes1995_SW: FileName=Observed.xlsx; SheetNames=[ObservedLawes1995_SW]
  Folder Validation
    Memo Combined Results
      ### Combined Results

      Simulation results for the combined datasets from the various growing regions are shown in the following graphs. The model is able to adequately capture the influence of growing conditions (e.g. soil, climate) and management (e.g. population, irrigation, sowing date).
    Folder SE Queensland
      Memo
        A selection of data from Kenya has been included from the work of Keating et al (1992).  These include the trial originally labelled JMW2 by the original authors and was labelled Experiment 6 in Keating et al (1992).  This trial includes maize (cultivar Katumani Composite B) sown at 5 populations (1.1, 2.2, 4.4, 6.6 and 8.8 plants/m2) under low (0 kg N/ha applied) and high (120 kgN/ha) fertiliser conditions during the Long Rains of 1988.  This same experimental design was conducted at two locations, Katumani (1o 35' S, 37o 14' E) and Kiboko (2o 13' S, 37o 43' E). The trial was rainfed at Katumani but fully irrigated at Kiboko.  Yields ranged from 2000 to 5400 kg/ha at Katumani and 1000 to 6000 kg/ha at Kiboko.  There were strong population x nitrogen interactions at both sites.  A second trial refered to as BMW1 or Experiment 1 in Keating et al(1992).  A range of populations (2.0-6.5 plants/m2) and irrigation treatments (6-176 mm) where planted under high (80 kgN/ha) and low (0kgN/ha) fertiliser conditions at Katumani. Individual replicates are modelled separately due to variability in soil (depth to rock), establishment and irrigation application.  Grain yields varied from 1600 to 8000 kg/ha.
      Experiment Lawes1990
        Factors
          Factor Sowing: Specifications=[Sowing]
            Operations 1
              1990-05-20  [Chickpea].Sow(population:33.4, cultivar:"Amethyst", depth:50, rowSpacing:350);
              1990-07-29  [Irrigation].Apply(amount:100, depth:0,efficiency:1, willRunoff:false);
              1990-08-28  [Irrigation].Apply(amount:100, depth:0,efficiency:1, willRunoff:false);
              1990-09-27  [Irrigation].Apply(amount:100, depth:0,efficiency:1, willRunoff:false);
            Operations 2
              1990-08-06  [Chickpea].Sow(population:43, cultivar:"Amethyst", depth:50, rowSpacing:750);
              1990-09-17  [Irrigation].Apply(amount:100, depth:0,efficiency:1, willRunoff:false);
              1990-10-07  [Irrigation].Apply(amount:100, depth:0,efficiency:1, willRunoff:false);
              1990-10-27  [Irrigation].Apply(amount:100, depth:0,efficiency:1, willRunoff:false);
              1990-11-16  [Irrigation].Apply(amount:100, depth:0,efficiency:1, willRunoff:false);
              1990-11-26  [Irrigation].Apply(amount:100, depth:0,efficiency:1, willRunoff:false);
        Simulation Lawes1990: Area=0; Slope=0
          Weather: FileName=cooper.met
          Clock: StartDate=1990-01-01; EndDate=1990-12-31
          Summary summaryfile
          SoilArbitrator Soil Arbitrator
          Zone Field: Area=1; Slope=0
            MicroClimate: a_interception=0; b_interception=1; c_interception=0; d_interception=0; soil_albedo=0.23; air_pressure=1010; soil_emissivity=0.96; sun_angle=15; soil_heat_flux_fraction=0.4; night_interception_fraction=0.5; windspeed_default=3; refheight=2; albedo=0.15; emissivity=0.96; gsmax=0.01; r50=200
            Irrigation
            Fertiliser
            SurfaceOrganicMatter: PoolName=maize; type=maize; mass=500; standing_fraction=0; cnr=65; CriticalResidueWeight=2000; OptimumDecompTemp=20; MaxCumulativeEOS=20; CNRatioDecompCoeff=0.277; CNRatioDecompThreshold=25; TotalLeachRain=25; MinRainToLeach=10; CriticalMinimumOrganicC=0.004; DefaultCPRatio=0; DefaultStandingFraction=0; StandingExtinctCoeff=0.5; FractionFaecesAdded=0.5
              Pools:
                {PoolName=maize, ResidueType=maize, Mass=500, CNRatio=65, StandingFraction=0}
              ResidueTypes ResidueTypesList: LoadFromResource=ResidueTypes
            Operations Sowing
            Operations NRate
              1985-11-08  [Fertiliser].Apply(50, Fertiliser.Types.NH4NO3N, 10);
              1985-11-29  [Fertiliser].Apply(30, Fertiliser.Types.NH4NO3N, 10);
            Arbitrator: ArbitrationMethod=Old; NutrientUptakeMethod=2
            Report: EventNames=[Clock].DoReport
              VariableNames:
                [Clock].Today
                [Soil].SoilWater.SW
                [Soil].SoilWater.Eo
                [Soil].SoilWater.Es
                [Soil].SoilWater.Drainage
                [Soil].SoilWater.Runoff
                [Soil].SoilWater.pond
                sum([Soil].SoilWater.SWmm) as ProfileWater
                [Soil].NO3N
                [MicroClimate].net_radn
                [MicroClimate].peta
                [MicroClimate].petr
            Soil: Latitude=0; Longitude=0
              Water
                Thickness  BD    AirDry  LL15   DUL    SAT
                150        1.32  0.1     0.31   0.413  0.453
                150        1.32  0.1     0.31   0.413  0.453
                150        1.38  0.26    0.313  0.454  0.479
                300        1.33  0.32    0.376  0.495  0.498
                300        1.33  0.3     0.356  0.495  0.498
                300        1.42  0.27    0.3    0.418  0.464
                300        1.33  0.24    0.303  0.4    0.457
                300        1.35  0.31    0.31   0.37   0.435
                400        1.4   0.16    0.16   0.29   0.38
                SoilCrop ChickpeaSoil: LL=[0.3, 0.3, 0.3, 0.35, 0.35, 0.27, 0.303, 0.31, 0.16]; KL=[0.06, 0.06, 0.06, 0.06, 0.05, 0.04, 0.02, 0.02, 0.01]; XF=[1, 1, 1, 1, 1, 1, 1, 1, 1]
              SoilWater: residueinterception=0; SummerDate=1-Nov; SummerU=9; SummerCona=3; WinterDate=1-Apr; WinterU=9; WinterCona=3; DiffusConst=88; DiffusSlope=35.4; Salb=0.13; CN2Bare=50; CNRed=20; CNCov=0.8; max_pond=0; Thickness=[100, 100, 100, 200, 200, 200, 200, 200, 200]; SWCON=[0.5, 0.5, 0.5, 0.5, 0.5, 0.5, 0.5, 0.5, 0.5]
              SoilNitrogen: fom_type=[default, manure, mucuna, lablab, shemp, stable]; fract_carb=[0.2, 0.3, 0.54, 0.57, 0.45, 0]; fract_cell=[0.7, 0.3, 0.37, 0.37, 0.47, 0.1]; fract_lign=[0.1, 0.4, 0.09, 0.06, 0.08, 0.9]; wfpsN2N2O_x=[22, 88]; wfpsN2N2O_y=[0.1, 1]
              SoilOrganicMatter: RootCN=45; RootWt=1000; SoilCN=14.5; EnrACoeff=7.4; EnrBCoeff=0.2; OCUnits=Total
                Thickness  OC    FBiom  FInert
                100        1.2   0.02   0.42
                100        1     0.01   0.5
                100        0.86  0.01   0.58
                200        0.83  0.01   0.55
                200        0.58  0.01   0.86
                200        0.54  0.01   0.9
                200        0.47  0.01   0.95
                200        0.5   0.01   0.95
                200        0.5   0.01   0.95
              Analysis: Thickness=[100, 100, 100, 200, 200, 200, 200, 200, 200]; PH=[6, 6, 6, 6.2, 6.5, 6.7, 6.8, 6.8, 6.8]; PHUnits=Water; BoronUnits=HotWater
              Sample InitialN: NO3Units=ppm; NH4Units=ppm; SWUnits=Volumetric; OCUnits=Total; PHUnits=Water
                Thickness  NO3   NH4
                150        14.4  0.6
                150        6.58  0.1
                300        2.45  0.1
                300        1.08  0.1
                300        0.15  0.1
                300        0.83  0.1
                300        2.3   0.1
              Sample InitialSW: Thickness=[150, 150, 300, 300, 300, 300, 300]; SW=[0.413, 0.456, 0.408, 0.374, 0.327, 0.325, 0.371]; NO3Units=ppm; NH4Units=ppm; SWUnits=Volumetric; OCUnits=Total; PHUnits=Water
            Report HarvestReport: EventNames=[Chickpea].Harvesting
              VariableNames:
                [Clock].Today
                [Chickpea].Phenology.CurrentStageName as Stage
                [Chickpea].Phenology.FloweringDAS.Value as FloweringDAS
                [Chickpea].Phenology.MaturityDAS.Value as MaturityDAS
                [Chickpea].Grain.Live.Wt as GrainWt
                [Chickpea].AboveGround.Wt
            Manager Harvesting
```csharp
using System;
using Models.Core;
using System.Collections.Generic;
using System.Text;
using Models.Soils;
using Models.PMF;
using Models;
using System.Xml.Serialization;
using APSIM.Shared.Utilities;

namespace Models
{
	[Serializable] 
	public class Script : Model
	{      
		[Link] Plant Chickpea;          
		[Link] Zone zone;			
					
        
        [EventSubscribe("Commencing")]
        private void OnSimulationCommencing(object sender, EventArgs e)
        {
		}	   
		
		[EventSubscribe("DoManagement")]
		private void OnDoManagement(object sender, EventArgs e)
		{
        if (Chickpea.Phenology.CurrentPhaseName=="ReadyForHarvesting")
           {
           Chickpea.Harvest();
           Chickpea.EndCrop();
           }
		}
		
		[EventSubscribe("DoManagementCalculations")]
		private void OnDoManagementCalculations(object sender, EventArgs e)
		{
			
		}
	}
}
```
            Plant Chickpea: CropType=Chickpea
            Manager AutoIrrigate
              FASW = 0
              WaterDeficit = 0
              AutoIrrigationOn = True
              StartStageName = Emergence
              EndStageName = EndGrainFill
              FASWThreshold = 0.9
              FASWDepth = 1000
```csharp
using System;
using Models.Core;
using System.Collections.Generic;
using System.Text;
using Models.Soils;
using Models.PMF;
using Models;
using System.Xml.Serialization;
using APSIM.Shared.Utilities;

namespace Models
{
	[Serializable] 
	public class Script : Model
	{
		public double FASW { get; set; }
		public double WaterDeficit  { get; set; }
	
		[Link] Plant Chickpea;
		[Link] Zone zone;
		[Link] Irrigation irrigation;
		[Link] Soil soil;
		
		[Description("Auto irrigation on?")]
		public bool AutoIrrigationOn { get; set; }
		
		[Description("Irrigation window start stage")]
		public string StartStageName { get; set; }
		[Description("Irrigation window end stage")]
		public string EndStageName { get; set; }

		[Description("Threshold fraction available water (0-1)")]
		public double FASWThreshold { get; set; }

		[Description("Soil depth (mm) to which fraction available water is calculated")]
		public double FASWDepth { get; set; }

		[EventSubscribe("DoManagement")]
		private void OnDoManagement(object sender, EventArgs e)
		{
			CalculateFASW();
			if (AutoIrrigationOn && Chickpea.Phenology.Between(StartStageName, EndStageName))
			{
				if (FASW < FASWThreshold)
				{
					double amount = 10;
					irrigation.Apply(WaterDeficit, depth: 0);
				}
			}
		}
		
		private void CalculateFASW()
		{
			double[] LL15 = MathUtilities.Multiply(soil.LL15, soil.Thickness);
			double[] DUL = MathUtilities.Multiply(soil.DUL, soil.Thickness);
		
			int nlayr = GetLayerIndex();
			double cumdep = MathUtilities.Sum(soil.Thickness, 0, nlayr, 0.0);

			double excess_fr = MathUtilities.Divide((cumdep - FASWDepth), soil.Thickness[nlayr], 0.0);

			// note that results may be strange if swdep < ll15
			double avail_sw = (MathUtilities.Sum(soil.Water, 0, nlayr, 0.0)
			                  - excess_fr * soil.Water[nlayr])
			                  - (MathUtilities.Sum(LL15, 0, nlayr, 0.0)
			                  - excess_fr * LL15[nlayr]);


			double pot_avail_sw = (MathUtilities.Sum(DUL, 0, nlayr, 0.0)
			                      - excess_fr * DUL[nlayr])
			                      - (MathUtilities.Sum(LL15, 0, nlayr, 0.0)
			                      - excess_fr * LL15[nlayr]);

			FASW = MathUtilities.Divide(avail_sw, pot_avail_sw, 0.0);
			WaterDeficit = MathUtilities.Constrain(pot_avail_sw - avail_sw, 0.0, 100000);
		}

		private int GetLayerIndex()
		{
			double[] cumThickness = Soil.ToCumThickness(soil.Thickness);
			for (int i = 1; i < cumThickness.Length; i++)
			{
				if (FASWDepth < cumThickness[i])
					return i - 1;
			}
			
			return cumThickness.Length - 1;
		}

	}
}
```
      Experiment Lawes1991
        Factors Factors2
          Factor Sowing: Specifications=[Sowing]
            Operations 1
              1991-05-29  [Chickpea].Sow(population:28, cultivar:"Amethyst", depth:50, rowSpacing:350);
              1991-05-29  [Irrigation].Apply(amount:40, depth:0,efficiency:1, willRunoff:false);
              1991-06-20  [Irrigation].Apply(amount:40, depth:0,efficiency:1, willRunoff:false);
              1991-07-10  [Irrigation].Apply(amount:40, depth:0,efficiency:1, willRunoff:false);
              1991-07-30  [Irrigation].Apply(amount:40, depth:0,efficiency:1, willRunoff:false);
              1991-08-19  [Irrigation].Apply(amount:40, depth:0,efficiency:1, willRunoff:false);
              1991-09-08  [Irrigation].Apply(amount:40, depth:0,efficiency:1, willRunoff:false);
              1991-09-28  [Irrigation].Apply(amount:40, depth:0,efficiency:1, willRunoff:false);
              1991-10-18  [Irrigation].Apply(amount:40, depth:0,efficiency:1, willRunoff:false);
              1991-11-07  [Irrigation].Apply(amount:40, depth:0,efficiency:1, willRunoff:false);
            Operations 2
              1991-07-30  [Chickpea].Sow(population:28, cultivar:"Amethyst", depth:50, rowSpacing:350);
              1991-05-29  [Irrigation].Apply(amount:40, depth:0,efficiency:1, willRunoff:false);
              1991-06-20  [Irrigation].Apply(amount:40, depth:0,efficiency:1, willRunoff:false);
              1991-07-10  [Irrigation].Apply(amount:40, depth:0,efficiency:1, willRunoff:false);
              1991-07-30  [Irrigation].Apply(amount:40, depth:0,efficiency:1, willRunoff:false);
              1991-08-19  [Irrigation].Apply(amount:40, depth:0,efficiency:1, willRunoff:false);
              1991-09-08  [Irrigation].Apply(amount:40, depth:0,efficiency:1, willRunoff:false);
              1991-09-28  [Irrigation].Apply(amount:40, depth:0,efficiency:1, willRunoff:false);
              1991-10-18  [Irrigation].Apply(amount:40, depth:0,efficiency:1, willRunoff:false);
              1991-11-07  [Irrigation].Apply(amount:40, depth:0,efficiency:1, willRunoff:false);
        Simulation Lawes1991: Area=0; Slope=0
          Weather: FileName=cooper.met
          Clock: StartDate=1991-01-01; EndDate=1991-12-31
          Summary summaryfile
          SoilArbitrator Soil Arbitrator
          Zone Field: Area=1; Slope=0
            MicroClimate: same as Validation.SE Queensland.Lawes1990.Lawes1990.Field.MicroClimate
            Irrigation
            Fertiliser
            SurfaceOrganicMatter: same as Validation.SE Queensland.Lawes1990.Lawes1990.Field.SurfaceOrganicMatter
            Operations Sowing
            Operations NRate
              1985-11-08  [Fertiliser].Apply(50, Fertiliser.Types.NH4NO3N, 10);
              1985-11-29  [Fertiliser].Apply(30, Fertiliser.Types.NH4NO3N, 10);
            Arbitrator: ArbitrationMethod=Old; NutrientUptakeMethod=2
            Report: EventNames=[Clock].DoReport
              VariableNames:
                [Clock].Today
                [Soil].SoilWater.SW
                [Soil].SoilWater.Eo
                [Soil].SoilWater.Es
                [Soil].SoilWater.Drainage
                [Soil].SoilWater.Runoff
                [Soil].SoilWater.pond
                sum([Soil].SoilWater.SWmm) as ProfileWater
                [Soil].NO3N
                [MicroClimate].net_radn
                [MicroClimate].peta
                [MicroClimate].petr
                [Chickpea].Leaf.LAI
                [Chickpea].Structure.MainStemNodeNo
                [Chickpea].Structure.PlantTotalNodeNo
                [Chickpea].Leaf.SenescingCohortNo
                [Chickpea].Structure.TotalStemPopn
                [Chickpea].AboveGround.Wt
                [Chickpea].Leaf.Live.Wt
                [Chickpea].Stem.Live.Wt
            Soil: Latitude=0; Longitude=0
              Water
                Thickness  BD    AirDry  LL15  DUL    SAT
                150        1.38  0.05    0.18  0.384  0.434
                150        1.38  0.19    0.19  0.381  0.431
                300        1.32  0.2     0.2   0.44   0.49
                300        1.46  0.22    0.22  0.424  0.448
                300        1.51  0.19    0.19  0.419  0.43
                300        1.49  0.17    0.17  0.376  0.426
                300        1.47  0.17    0.17  0.377  0.427
                SoilCrop ChickpeaSoil: LL=[0.25, 0.25, 0.23, 0.25, 0.2, 0.2, 0.2]; KL=[0.06, 0.06, 0.06, 0.05, 0.04, 0.02, 0.02]; XF=[1, 1, 1, 1, 1, 0, 0]
              SoilWater: same as Validation.SE Queensland.Lawes1990.Lawes1990.Field.soil.SoilWater
              SoilNitrogen: fom_type=[default, manure, mucuna, lablab, shemp, stable]; fract_carb=[0.2, 0.3, 0.54, 0.57, 0.45, 0]; fract_cell=[0.7, 0.3, 0.37, 0.37, 0.47, 0.1]; fract_lign=[0.1, 0.4, 0.09, 0.06, 0.08, 0.9]; wfpsN2N2O_x=[22, 88]; wfpsN2N2O_y=[0.1, 1]
              SoilOrganicMatter: same as Validation.SE Queensland.Lawes1990.Lawes1990.Field.soil.SoilOrganicMatter
              Analysis: Thickness=[100, 100, 100, 200, 200, 200, 200, 200, 200]; PH=[6, 6, 6, 6.2, 6.5, 6.7, 6.8, 6.8, 6.8]; PHUnits=Water; BoronUnits=HotWater
              Sample InitialN: NO3Units=ppm; NH4Units=ppm; SWUnits=Volumetric; OCUnits=Total; PHUnits=Water
                Thickness  NO3   NH4
                150        14.3  0
                150        5.9   0
                300        1.8   0
                300        0.9   0
                300        1     0
                300        0.2   0
                300        0.1   0
              Sample InitialSW: Thickness=[150, 150, 300, 300, 300, 300, 300]; SW=[0.384, 0.381, 0.44, 0.424, 0.419, 0.376, 0.377]; NO3Units=ppm; NH4Units=ppm; SWUnits=Volumetric; OCUnits=Total; PHUnits=Water
            Report HarvestReport: EventNames=[Chickpea].Harvesting
              VariableNames:
                [Clock].Today
                [Chickpea].Phenology.CurrentStageName as Stage
                [Chickpea].Phenology.FloweringDAS.Value as FloweringDAS
                [Chickpea].Phenology.MaturityDAS.Value as MaturityDAS
                [Chickpea].Grain.Live.Wt as GrainWt
            Manager Harvesting: same as Validation.SE Queensland.Lawes1990.Lawes1990.Field.Harvesting
            Plant Chickpea: CropType=Chickpea
            Manager AutoIrrigate: same as Validation.SE Queensland.Lawes1990.Lawes1990.Field.AutoIrrigate
      Experiment Lawes1993
        Factors
          Factor SD: Specifications=[SowingRule]
            Operations 1PP20RS17
              1993-05-25  [Chickpea].Sow(population:14, cultivar:"Amethyst", depth:50, rowSpacing:170);
              1993-07-05  [Irrigation].Apply(52);
            Operations 1PP20RS35
              1993-05-25  [Chickpea].Sow(population:26, cultivar:"Amethyst", depth:50, rowSpacing:350);
              1993-07-05  [Irrigation].Apply(52);
            Operations 1PP20RS70
              1993-05-25  [Chickpea].Sow(population:25, cultivar:"Amethyst", depth:50, rowSpacing:700);
              1993-07-05  [Irrigation].Apply(52);
            Operations 1PP45RS17
              1993-05-25  [Chickpea].Sow(population:27, cultivar:"Amethyst", depth:50, rowSpacing:170);
              1993-07-05  [Irrigation].Apply(52);
            Operations 1PP90RS35
              1993-05-25  [Chickpea].Sow(population:85, cultivar:"Amethyst", depth:50, rowSpacing:350);
              1993-07-05  [Irrigation].Apply(52);
            Operations 1PP90RS70
              1993-05-25  [Chickpea].Sow(population:56, cultivar:"Amethyst", depth:50, rowSpacing:700);
              1993-07-05  [Irrigation].Apply(52);
            Operations 2PP20RS17
              1993-05-25  [Chickpea].Sow(population:17, cultivar:"Amethyst", depth:50, rowSpacing:170);
            Operations 2PP20RS35
              1993-05-25  [Chickpea].Sow(population:37, cultivar:"Amethyst", depth:50, rowSpacing:350);
            Operations 2PP20RS70
              1993-05-25  [Chickpea].Sow(population:39, cultivar:"Amethyst", depth:50, rowSpacing:700);
        Simulation Lawes1993: Area=0; Slope=0
          Weather: FileName=cooper.met
          Clock: StartDate=1993-05-24; EndDate=1993-12-31
          Summary summaryfile
          SoilArbitrator Soil Arbitrator
          Zone Field: Area=1; Slope=0
            MicroClimate: same as Validation.SE Queensland.Lawes1990.Lawes1990.Field.MicroClimate
            Irrigation
            Fertiliser
            SurfaceOrganicMatter: same as Validation.SE Queensland.Lawes1990.Lawes1990.Field.SurfaceOrganicMatter
            Operations SowingRule
              1993-05-25  [Chickpea].Sow(population:14, cultivar:"Amethyst", depth:50, rowSpacing:170);
              1993-07-05  [Irrigation].Apply(52);
            Operations NRate
              1985-11-08  [Fertiliser].Apply(50, Fertiliser.Types.NH4NO3N, 10);
              1985-11-29  [Fertiliser].Apply(30, Fertiliser.Types.NH4NO3N, 10);
            Arbitrator: ArbitrationMethod=Old; NutrientUptakeMethod=2
            Report: EventNames=[Clock].DoReport
              VariableNames:
                [Clock].Today
                [Soil].SoilWater.SW
                [Soil].SoilWater.Eo
                [Soil].SoilWater.Es
                [Soil].SoilWater.Drainage
                [Soil].SoilWater.Runoff
                [Soil].SoilWater.pond
                sum([Soil].SoilWater.SWmm) as ProfileWater
                [Soil].NO3N
                [MicroClimate].net_radn
                [MicroClimate].peta
                [MicroClimate].petr
            Soil: Latitude=0; Longitude=0
              Water: same as Validation.SE Queensland.Lawes1991.Lawes1991.Field.soil.Water
              SoilWater: same as Validation.SE Queensland.Lawes1990.Lawes1990.Field.soil.SoilWater
              SoilNitrogen: fom_type=[default, manure, mucuna, lablab, shemp, stable]; fract_carb=[0.2, 0.3, 0.54, 0.57, 0.45, 0]; fract_cell=[0.7, 0.3, 0.37, 0.37, 0.47, 0.1]; fract_lign=[0.1, 0.4, 0.09, 0.06, 0.08, 0.9]; wfpsN2N2O_x=[22, 88]; wfpsN2N2O_y=[0.1, 1]
              SoilOrganicMatter: same as Validation.SE Queensland.Lawes1990.Lawes1990.Field.soil.SoilOrganicMatter
              Analysis: Thickness=[100, 100, 100, 200, 200, 200, 200, 200, 200]; PH=[6, 6, 6, 6.2, 6.5, 6.7, 6.8, 6.8, 6.8]; PHUnits=Water; BoronUnits=HotWater
              Sample InitialN: NO3Units=ppm; NH4Units=ppm; SWUnits=Volumetric; OCUnits=Total; PHUnits=Water
                Thickness  NO3   NH4
                150        14.3  0
                150        5.9   0
                300        1.8   0
                300        0.9   0
                300        1     0
                300        0.2   0
                300        0.1   0
              Sample InitialSW: Thickness=[150, 150, 300, 300, 300, 300, 300]; SW=[0.184, 0.181, 0.24, 0.324, 0.319, 0.276, 0.277]; NO3Units=ppm; NH4Units=ppm; SWUnits=Volumetric; OCUnits=Total; PHUnits=Water
            Report HarvestReport: EventNames=[Chickpea].Harvesting
              VariableNames:
                [Clock].Today
                [Chickpea].Phenology.CurrentStageName as Stage
                [Chickpea].Phenology.FloweringDAS.Value as FloweringDAS
                [Chickpea].Phenology.MaturityDAS.Value as MaturityDAS
                [Chickpea].Grain.Live.Wt as GrainWt
            Manager Harvesting: same as Validation.SE Queensland.Lawes1990.Lawes1990.Field.Harvesting
            Plant Chickpea: CropType=Chickpea
            Manager AutoIrrigate
              FASW = 0
              WaterDeficit = 0
              AutoIrrigationOn = False
              StartStageName = Emergence
              EndStageName = EndGrainFill
              FASWThreshold = 0.9
              FASWDepth = 1000
              script: same as in Validation.SE Queensland.Lawes1990.Lawes1990.Field.AutoIrrigate
      Experiment Lawes1995
        Factors
          Factor Sowing: Specifications=[Sowing]
            Operations Wet
              1995-06-15  [Chickpea].Sow(population:37.3, cultivar:"Amethyst", depth:50, rowSpacing:350);
              1995-06-22  [Irrigation].Apply(amount:3, depth:0,efficiency:1, willRunoff:false);
              1995-06-23  [Irrigation].Apply(amount:5.25, depth:0,efficiency:1, willRunoff:false);
              1995-06-26  [Irrigation].Apply(amount:3, depth:0,efficiency:1, willRunoff:false);
              1995-07-05  [Irrigation].Apply(amount:7, depth:0,efficiency:1, willRunoff:false);
              1995-07-13  [Irrigation].Apply(amount:24, depth:0,efficiency:1, willRunoff:false);
              1995-07-21  [Irrigation].Apply(amount:13.5, depth:0,efficiency:1, willRunoff:false);
              1995-08-01  [Irrigation].Apply(amount:28, depth:0,efficiency:1, willRunoff:false);
              1995-08-11  [Irrigation].Apply(amount:30, depth:0,efficiency:1, willRunoff:false);
              1995-08-25  [Irrigation].Apply(amount:15, depth:0,efficiency:1, willRunoff:false);
              1995-08-31  [Irrigation].Apply(amount:14, depth:0,efficiency:1, willRunoff:false);
              1995-09-04  [Irrigation].Apply(amount:15, depth:0,efficiency:1, willRunoff:false);
              1995-09-15  [Irrigation].Apply(amount:25, depth:0,efficiency:1, willRunoff:false);
              1995-09-22  [Irrigation].Apply(amount:20, depth:0,efficiency:1, willRunoff:false);
              1995-09-29  [Irrigation].Apply(amount:9, depth:0,efficiency:1, willRunoff:false);
              1995-10-02  [Irrigation].Apply(amount:11, depth:0,efficiency:1, willRunoff:false);
            Operations Dry
              1995-06-14  [Chickpea].Sow(population:37.3, cultivar:"Amethyst", depth:50, rowSpacing:350);
              1995-06-22  [Irrigation].Apply(amount:3, depth:0,efficiency:1, willRunoff:false);
              1995-06-23  [Irrigation].Apply(amount:5.25, depth:0,efficiency:1, willRunoff:false);
              1995-06-26  [Irrigation].Apply(amount:3, depth:0,efficiency:1, willRunoff:false);
              1995-07-05  [Irrigation].Apply(amount:7, depth:0,efficiency:1, willRunoff:false);
              1995-07-13  [Irrigation].Apply(amount:24, depth:0,efficiency:1, willRunoff:false);
        Simulation Lawes1995: Area=0; Slope=0
          Weather: FileName=APS27.met
          Clock: StartDate=1995-06-14; EndDate=1995-12-31
          Summary summaryfile
          SoilArbitrator Soil Arbitrator
          Zone Field: Area=1; Slope=0
            MicroClimate: same as Validation.SE Queensland.Lawes1990.Lawes1990.Field.MicroClimate
            Irrigation
            Fertiliser
            SurfaceOrganicMatter: same as Validation.SE Queensland.Lawes1990.Lawes1990.Field.SurfaceOrganicMatter
            Operations Sowing
            Operations NRate
              1985-11-08  [Fertiliser].Apply(50, Fertiliser.Types.NH4NO3N, 10);
              1985-11-29  [Fertiliser].Apply(30, Fertiliser.Types.NH4NO3N, 10);
            Arbitrator: ArbitrationMethod=Old; NutrientUptakeMethod=2
            Report: EventNames=[Clock].DoReport
              VariableNames:
                [Clock].Today
                [Soil].SoilWater.SW
                [Soil].SoilWater.Eo
                [Soil].SoilWater.Es
                [Soil].SoilWater.Drainage
                [Soil].SoilWater.Runoff
                [Soil].SoilWater.pond
                sum([Soil].SoilWater.SWmm) as ProfileWater
                [Soil].NO3N
                [MicroClimate].net_radn
                [MicroClimate].peta
                [MicroClimate].petr
            Soil: Latitude=0; Longitude=0
              Water
                Thickness  BD    AirDry  LL15   DUL    SAT
                150        1.4   0.05    0.2    0.36   0.455
                150        1.4   0.19    0.24   0.373  0.423
                300        1.35  0.2     0.215  0.389  0.439
                300        1.46  0.22    0.239  0.348  0.398
                300        1.42  0.19    0.21   0.365  0.415
                300        1.45  0.17    0.23   0.352  0.402
                300        1.52  0.17    0.189  0.327  0.377
                SoilCrop ChickpeaSoil: LL=[0.2, 0.24, 0.22, 0.24, 0.21, 0.23, 0.19]; KL=[0.06, 0.06, 0.06, 0.05, 0.05, 0.05, 0.02]; XF=[1, 1, 1, 1, 1, 1, 1]
              SoilWater: residueinterception=0; SummerDate=1-Nov; SummerU=9; SummerCona=3; WinterDate=1-Apr; WinterU=9; WinterCona=3; DiffusConst=40; DiffusSlope=16; Salb=0.13; CN2Bare=50; CNRed=20; CNCov=0.8; max_pond=0; Thickness=[100, 100, 100, 200, 200, 200, 200, 200, 200]; SWCON=[0.5, 0.5, 0.5, 0.5, 0.5, 0.5, 0.5, 0.5, 0.5]
              SoilNitrogen: fom_type=[default, manure, mucuna, lablab, shemp, stable]; fract_carb=[0.2, 0.3, 0.54, 0.57, 0.45, 0]; fract_cell=[0.7, 0.3, 0.37, 0.37, 0.47, 0.1]; fract_lign=[0.1, 0.4, 0.09, 0.06, 0.08, 0.9]; wfpsN2N2O_x=[22, 88]; wfpsN2N2O_y=[0.1, 1]
              SoilOrganicMatter: same as Validation.SE Queensland.Lawes1990.Lawes1990.Field.soil.SoilOrganicMatter
              Analysis: Thickness=[100, 100, 100, 200, 200, 200, 200, 200, 200]; PH=[6, 6, 6, 6.2, 6.5, 6.7, 6.8, 6.8, 6.8]; PHUnits=Water; BoronUnits=HotWater
              Sample InitialN: NO3Units=ppm; NH4Units=ppm; SWUnits=Volumetric; OCUnits=Total; PHUnits=Water
                Thickness  NO3   NH4
                150        14.3  0
                150        5.9   0
                300        1.8   0
                300        0.9   0
                300        1     0
                300        0.2   0
                300        0.1   0
              Sample InitialSW: Thickness=[150, 150, 300, 300, 300, 300, 300]; SW=[0.31, 0.35, 0.31, 0.325, 0.3, 0.29, 0.28]; NO3Units=ppm; NH4Units=ppm; SWUnits=Volumetric; OCUnits=Total; PHUnits=Water
            Report HarvestReport: EventNames=[Chickpea].Harvesting
              VariableNames:
                [Clock].Today
                [Chickpea].Phenology.CurrentStageName as Stage
                [Chickpea].Phenology.FloweringDAS.Value as FloweringDAS
                [Chickpea].Phenology.MaturityDAS.Value as MaturityDAS
                [Chickpea].Grain.Live.Wt as GrainWt
            Manager Harvesting: same as Validation.SE Queensland.Lawes1990.Lawes1990.Field.Harvesting
            Plant Chickpea: CropType=Chickpea
            Manager AutoIrrigate: same as Validation.SE Queensland.Lawes1993.Lawes1993.Field.AutoIrrigate
      Experiment Lawes1999
        Factors
          Factor NRate: Specifications=[NRateSchedule]
            Operations 0
              1999-05-26  [Fertiliser].Apply(0, Fertiliser.Types.NH4NO3N, 10);
            Operations 50
              1999-05-26  [Fertiliser].Apply(50, Fertiliser.Types.NH4NO3N, 10);
            Operations 100
              1999-05-26  [Fertiliser].Apply(100, Fertiliser.Types.NH4NO3N, 10);
        Simulation Lawes1999: Area=0; Slope=0
          Weather: FileName=Gatton1999.met
          Clock: StartDate=1999-05-20; EndDate=1999-12-01
          Summary summaryfile
          SoilArbitrator Soil Arbitrator
          Zone Field: Area=1; Slope=0
            MicroClimate: same as Validation.SE Queensland.Lawes1990.Lawes1990.Field.MicroClimate
            Fertiliser
            SurfaceOrganicMatter: PoolName=unknown; type=wheat; mass=0; standing_fraction=0; cnr=10; CriticalResidueWeight=2000; OptimumDecompTemp=20; MaxCumulativeEOS=20; CNRatioDecompCoeff=0.277; CNRatioDecompThreshold=25; TotalLeachRain=25; MinRainToLeach=10; CriticalMinimumOrganicC=0.004; DefaultCPRatio=0; DefaultStandingFraction=0; StandingExtinctCoeff=0.5; FractionFaecesAdded=0.5
              Pools:
                {PoolName=unknown, ResidueType=wheat, Mass=0, CNRatio=10, StandingFraction=0}
              ResidueTypes ResidueTypesList: LoadFromResource=ResidueTypes
            Operations Sowing
              1999-05-26  [Chickpea].Sow(population:40, cultivar:"Amethyst", depth:50, rowSpacing:200);
            Report: EventNames=[Clock].DoReport
              VariableNames:
                [Clock].Today
                [Soil].SoilWater.SW
                [Soil].SoilWater.Eo
                [Soil].SoilWater.Es
                [Soil].SoilWater.Drainage
                [Soil].SoilWater.Runoff
                [Soil].SoilWater.pond
                sum([Soil].SoilWater.SWmm) as ProfileWater
                [Soil].NO3N
                [MicroClimate].net_radn
                [MicroClimate].peta
                [MicroClimate].petr
                [Chickpea].AboveGround.Wt
                [Chickpea].Leaf.LAI
                [Chickpea].Phenology.FloweringDAS.Value as FloweringDAS
                [Chickpea].Phenology.MaturityDAS.Value as MaturityDAS
                [Chickpea].Grain.Live.Wt as GrainWt
            Report HarvestReport: EventNames=[Chickpea].Harvesting
              VariableNames:
                [Clock].Today
                [Chickpea].Phenology.CurrentStageName as Stage
                [Chickpea].Phenology.FloweringDAS.Value as FloweringDAS
                [Chickpea].Phenology.MaturityDAS.Value as MaturityDAS
                [Chickpea].Grain.Live.Wt as GrainWt
            Manager Harvesting
              script: same as in Validation.SE Queensland.Lawes1990.Lawes1990.Field.Harvesting
            Plant Chickpea: CropType=Chickpea
            Soil: same as Validation.SE Queensland.Lawes1991.Lawes1991.Field.soil
            Operations NRateSchedule
              1999-05-26  [Fertiliser].Apply(0, Fertiliser.Types.NH4NO3N, 10);
            Manager AutoIrrigate: same as Validation.SE Queensland.Lawes1990.Lawes1990.Field.AutoIrrigate
            Irrigation
      Experiment Hermitage1988
        Factors
          Factor Sowing: Specifications=[Sowing]
            Operations c3p1
              1988-05-26  [Chickpea].Sow(population:67.2, cultivar:"Amethyst", depth:50, rowSpacing:350);
              1988-10-03  [Irrigation].Apply(amount:50, depth:0,efficiency:1, willRunoff:false);
            Operations c3p2
              1988-06-22  [Chickpea].Sow(population:49.9, cultivar:"Amethyst", depth:50, rowSpacing:350);
              1988-10-03  [Irrigation].Apply(amount:50, depth:0,efficiency:1, willRunoff:false);
              1988-10-03  [Irrigation].Apply(amount:50, depth:0,efficiency:1, willRunoff:false);
              1988-10-23  [Irrigation].Apply(amount:50, depth:0,efficiency:1, willRunoff:false);
            Operations c3p3
              1988-07-27  [Chickpea].Sow(population:49.9, cultivar:"Amethyst", depth:50, rowSpacing:350);
              1988-10-15  [Irrigation].Apply(amount:50, depth:0,efficiency:1, willRunoff:false);
              1988-10-23  [Irrigation].Apply(amount:50, depth:0,efficiency:1, willRunoff:false);
            Operations c3p4
              1988-09-04  [Chickpea].Sow(population:48.5, cultivar:"Amethyst", depth:50, rowSpacing:350);
              1988-10-23  [Irrigation].Apply(amount:50, depth:0,efficiency:1, willRunoff:false);
              1988-11-16  [Irrigation].Apply(amount:50, depth:0,efficiency:1, willRunoff:false);
              1988-11-30  [Irrigation].Apply(amount:50, depth:0,efficiency:1, willRunoff:false);
            Operations c3p5
              1988-10-19  [Chickpea].Sow(population:46.6, cultivar:"Amethyst", depth:50, rowSpacing:350);
              1988-10-23  [Irrigation].Apply(amount:50, depth:0,efficiency:1, willRunoff:false);
            Operations c3p6
              1988-12-14  [Chickpea].Sow(population:38.5, cultivar:"Amethyst", depth:50, rowSpacing:350);
              1989-02-22  [Irrigation].Apply(amount:50, depth:0,efficiency:1, willRunoff:false);
        Simulation Hermitage1988: Area=0; Slope=0
          Weather: FileName=Herm8889.met
          Clock: StartDate=1988-01-01; EndDate=1988-12-31
          Summary summaryfile
          SoilArbitrator Soil Arbitrator
          Zone Field: Area=1; Slope=0
            MicroClimate: same as Validation.SE Queensland.Lawes1990.Lawes1990.Field.MicroClimate
            Irrigation
            Fertiliser
            SurfaceOrganicMatter: same as Validation.SE Queensland.Lawes1990.Lawes1990.Field.SurfaceOrganicMatter
            Operations Sowing
            Operations NRate
              1985-11-08  [Fertiliser].Apply(50, Fertiliser.Types.NH4NO3N, 10);
              1985-11-29  [Fertiliser].Apply(30, Fertiliser.Types.NH4NO3N, 10);
            Arbitrator: ArbitrationMethod=Old; NutrientUptakeMethod=2
            Report: EventNames=[Clock].DoReport
              VariableNames:
                [Clock].Today
                [Soil].SoilWater.SW
                [Soil].SoilWater.Eo
                [Soil].SoilWater.Es
                [Soil].SoilWater.Drainage
                [Soil].SoilWater.Runoff
                [Soil].SoilWater.pond
                sum([Soil].SoilWater.SWmm) as ProfileWater
                [Soil].NO3N
                [MicroClimate].net_radn
                [MicroClimate].peta
                [MicroClimate].petr
            Soil: Latitude=0; Longitude=0
              Water
                Thickness  BD    AirDry  LL15  DUL   SAT
                150        1.03  0.1     0.2   0.38  0.45
                150        1.06  0.2     0.2   0.38  0.45
                300        1.06  0.2     0.2   0.38  0.45
                300        1.08  0.21    0.21  0.38  0.43
                300        1.11  0.23    0.23  0.38  0.43
                300        1.14  0.25    0.25  0.38  0.43
                300        1.14  0.28    0.28  0.35  0.4
                SoilCrop ChickpeaSoil: LL=[0.2, 0.2, 0.2, 0.22, 0.25, 0.26, 0.28]; KL=[0.06, 0.06, 0.06, 0.05, 0.04, 0.02, 0.02]; XF=[1, 1, 1, 1, 1, 0, 0]
              SoilWater: same as Validation.SE Queensland.Lawes1990.Lawes1990.Field.soil.SoilWater
              SoilNitrogen: fom_type=[default, manure, mucuna, lablab, shemp, stable]; fract_carb=[0.2, 0.3, 0.54, 0.57, 0.45, 0]; fract_cell=[0.7, 0.3, 0.37, 0.37, 0.47, 0.1]; fract_lign=[0.1, 0.4, 0.09, 0.06, 0.08, 0.9]; wfpsN2N2O_x=[22, 88]; wfpsN2N2O_y=[0.1, 1]
              SoilOrganicMatter: same as Validation.SE Queensland.Lawes1990.Lawes1990.Field.soil.SoilOrganicMatter
              Analysis: Thickness=[100, 100, 100, 200, 200, 200, 200, 200, 200]; PH=[6, 6, 6, 6.2, 6.5, 6.7, 6.8, 6.8, 6.8]; PHUnits=Water; BoronUnits=HotWater
              Sample InitialN: NO3Units=ppm; NH4Units=ppm; SWUnits=Volumetric; OCUnits=Total; PHUnits=Water
                Thickness  NO3   NH4
                150        14.4  4.8
                150        6.58  4.2
                300        2.45  3.9
                300        1.08  3.9
                300        0.15  3.8
                300        0.83  4.1
                300        0.83  4.1
              Sample InitialSW: Thickness=[150, 150, 300, 300, 300, 300, 300]; SW=[0.3, 0.3, 0.3, 0.31, 0.54, 0.37, 0.37]; NO3Units=ppm; NH4Units=ppm; SWUnits=Volumetric; OCUnits=Total; PHUnits=Water
            Report HarvestReport: EventNames=[Chickpea].Harvesting
              VariableNames:
                [Clock].Today
                [Chickpea].Phenology.CurrentStageName as Stage
                [Chickpea].Phenology.FloweringDAS.Value as FloweringDAS
                [Chickpea].Phenology.MaturityDAS.Value as MaturityDAS
                [Chickpea].Grain.Live.Wt as GrainWt
            Manager Harvesting: same as Validation.SE Queensland.Lawes1990.Lawes1990.Field.Harvesting
            Plant Chickpea: CropType=Chickpea
            Manager AutoIrrigate: same as Validation.SE Queensland.Lawes1990.Lawes1990.Field.AutoIrrigate
      Experiment Hermitage1989
        Factors
          Factor Sowing: Specifications=[Sowing]
            Operations c3p1
              1989-02-12  [Chickpea].Sow(population:33.4, cultivar:"Amethyst", depth:50, rowSpacing:350);
            Operations c3p2
              1989-04-23  [Chickpea].Sow(population:33.4, cultivar:"Amethyst", depth:50, rowSpacing:350);
            Operations c3p3
              1989-05-14  [Chickpea].Sow(population:33.4, cultivar:"Amethyst", depth:50, rowSpacing:350);
            Operations c3p4
              1989-06-18  [Chickpea].Sow(population:33.4, cultivar:"Amethyst", depth:50, rowSpacing:350);
            Operations c3p5
              1989-07-13  [Chickpea].Sow(population:33.4, cultivar:"Amethyst", depth:50, rowSpacing:350);
            Operations c3p6
              1989-08-27  [Chickpea].Sow(population:33.4, cultivar:"Amethyst", depth:50, rowSpacing:350);
            Operations c3p7
              1989-10-15  [Chickpea].Sow(population:33.4, cultivar:"Amethyst", depth:50, rowSpacing:350);
            Operations c3p8
              1989-11-12  [Chickpea].Sow(population:33.4, cultivar:"Amethyst", depth:50, rowSpacing:350);
        Simulation Hermitage1989: Area=0; Slope=0
          Weather: FileName=Herm8889.met
          Clock: StartDate=1989-01-01; EndDate=1989-12-31
          Summary summaryfile
          SoilArbitrator Soil Arbitrator
          Zone Field: Area=1; Slope=0
            MicroClimate: same as Validation.SE Queensland.Lawes1990.Lawes1990.Field.MicroClimate
            Irrigation
            Fertiliser
            SurfaceOrganicMatter: same as Validation.SE Queensland.Lawes1990.Lawes1990.Field.SurfaceOrganicMatter
            Operations Sowing
            Operations NRate
              1985-11-08  [Fertiliser].Apply(50, Fertiliser.Types.NH4NO3N, 10);
              1985-11-29  [Fertiliser].Apply(30, Fertiliser.Types.NH4NO3N, 10);
            Arbitrator: ArbitrationMethod=Old; NutrientUptakeMethod=2
            Report: EventNames=[Clock].DoReport
              VariableNames:
                [Clock].Today
                [Soil].SoilWater.SW
                [Soil].SoilWater.Eo
                [Soil].SoilWater.Es
                [Soil].SoilWater.Drainage
                [Soil].SoilWater.Runoff
                [Soil].SoilWater.pond
                sum([Soil].SoilWater.SWmm) as ProfileWater
                [Soil].NO3N
                [MicroClimate].net_radn
                [MicroClimate].peta
                [MicroClimate].petr
            Soil: Latitude=0; Longitude=0
              Water: same as Validation.SE Queensland.Hermitage1988.Hermitage1988.Field.soil.Water
              SoilWater: same as Validation.SE Queensland.Lawes1990.Lawes1990.Field.soil.SoilWater
              SoilNitrogen: fom_type=[default, manure, mucuna, lablab, shemp, stable]; fract_carb=[0.2, 0.3, 0.54, 0.57, 0.45, 0]; fract_cell=[0.7, 0.3, 0.37, 0.37, 0.47, 0.1]; fract_lign=[0.1, 0.4, 0.09, 0.06, 0.08, 0.9]; wfpsN2N2O_x=[22, 88]; wfpsN2N2O_y=[0.1, 1]
              SoilOrganicMatter: same as Validation.SE Queensland.Lawes1990.Lawes1990.Field.soil.SoilOrganicMatter
              Analysis: Thickness=[100, 100, 100, 200, 200, 200, 200, 200, 200]; PH=[6, 6, 6, 6.2, 6.5, 6.7, 6.8, 6.8, 6.8]; PHUnits=Water; BoronUnits=HotWater
              Sample InitialN: NO3Units=ppm; NH4Units=ppm; SWUnits=Volumetric; OCUnits=Total; PHUnits=Water
                Thickness  NO3   NH4
                150        14.4  4.8
                150        6.58  4.2
                300        2.45  3.9
                300        1.08  3.9
                300        0.15  3.8
                300        0.83  4.1
                300        0.83  4.1
              Sample InitialSW: Thickness=[150, 150, 300, 300, 300, 300, 300]; SW=[0.413, 0.456, 0.408, 0.374, 0.34, 0.37, 0.37]; NO3Units=ppm; NH4Units=ppm; SWUnits=Volumetric; OCUnits=Total; PHUnits=Water
            Report HarvestReport: EventNames=[Chickpea].Harvesting
              VariableNames:
                [Clock].Today
                [Chickpea].Phenology.CurrentStageName as Stage
                [Chickpea].Phenology.FloweringDAS.Value as FloweringDAS
                [Chickpea].Phenology.MaturityDAS.Value as MaturityDAS
                [Chickpea].Grain.Live.Wt as GrainWt
            Manager Harvesting: same as Validation.SE Queensland.Lawes1990.Lawes1990.Field.Harvesting
            Plant Chickpea: CropType=Chickpea
            Manager AutoIrrigate: same as Validation.SE Queensland.Lawes1990.Lawes1990.Field.AutoIrrigate
      Experiment Hermitage1990
        Factors
          Factor Sowing: Specifications=[Sowing]
            Operations c3p1
              1990-06-14  [Chickpea].Sow(population:45.4, cultivar:"Amethyst", depth:50, rowSpacing:350);
              1990-09-28  [Irrigation].Apply(amount:40, depth:0,efficiency:1, willRunoff:false);
            Operations c3p2
              1990-08-19  [Chickpea].Sow(population:36.7, cultivar:"Amethyst", depth:50, rowSpacing:350);
              1990-09-28  [Irrigation].Apply(amount:40, depth:0,efficiency:1, willRunoff:false);
        Simulation Hermitage1990: Area=0; Slope=0
          Weather: FileName=Herm90.met
          Clock: StartDate=1990-04-11; EndDate=1990-12-31
          Summary summaryfile
          SoilArbitrator Soil Arbitrator
          Zone Field: same as Validation.SE Queensland.Hermitage1989.Hermitage1989.Field
      Experiment Hermitage_92
        Factors
          Factor Population: Specifications=[SowingRule].Script.Population=10, 20, 40, 70, 78, 110, 115
          Factor RowSpacing: Specifications=[SowingRule].Script.RowSpacing=170, 350, 700
        Simulation Hermitage_92: Area=0; Slope=0
          Memo
            These simulations are based on data from two years of field trials done in Lincoln, Canterbury, New Zealand from 1998 to 2000. These trials used three cultivars of Kabuli chickpeas. However the results presented here are the average of cultivars for measurements that had no differences among cultivars tested. The experimental design was a split split plot with irrigation as main plot, sowing dates as sub plots and cultivars as sub sub plots.
            The first season, from 1998 until 1999, had two sowing dates (3rd if November and 7th of December) and eight irrigation treatments. Treatments were nil irrigation, full irrigation from emergence to physiological maturity, full from emergence to flowering, half irrigation from emergence to flowering, full from flowering to podding, half from flowering to podding, full from podding to physiological maturity and half from podding to physiological maturity. In these treatments irrigation was applied weekly and the fully irrigated treatment applied the same amount of water lost through evapotranspiration in the previous week. The half irrigation treatment replaced half of the amount lost in the previous week.
            Results from this season include biomass, grain yield, pods per plant, LAI, soil volumetric water content and flowering, podding and physsiological maturity dates.
            The second season, from 1999 to 2000, had two sowing dates (18th of October and 22nd of November) and four irrigation treatments. These were nil irrigation, full from emergence to physiological maturity, full from flowering to podding and full from podding to physiological maturity. The results from this season do not include LAI measurements.
            More information about the data is available in Anwar, M.R. 2001. Water use of Kabuli chickpea (Cicer arietinum L.) cultivars in Canterbury. (PhD thesis, Lincoln University).
          Weather: FileName=Herm92.met
          Clock: StartDate=1992-07-18; EndDate=1992-12-25
          Summary summaryfile
          SoilArbitrator Soil Arbitrator
          Zone Field: Area=1; Slope=0
            MicroClimate: same as Validation.SE Queensland.Lawes1990.Lawes1990.Field.MicroClimate
            Irrigation
            Fertiliser
            SurfaceOrganicMatter: same as Validation.SE Queensland.Lawes1990.Lawes1990.Field.SurfaceOrganicMatter
            Operations Sowing
              1992-07-24  [Chickpea].Sow(population:110, cultivar:"Amethyst", depth:50, rowSpacing:170);
            Operations IrrigationSchedule
            Report: EventNames=[Clock].DoReport
              VariableNames:
                [Clock].Today
                [Soil].SoilWater.SW
                [Soil].SoilWater.Eo
                [Soil].SoilWater.Es
                [Soil].SoilWater.Drainage
                [Soil].SoilWater.Runoff
                [Soil].SoilWater.pond
                sum([Soil].SoilWater.SWmm) as ProfileWater
                [Soil].NO3N
                [MicroClimate].net_radn
                [MicroClimate].peta
                [MicroClimate].petr
                [Chickpea].AboveGround.Wt
                [Chickpea].Leaf.LAI
            Report HarvestReport: EventNames=[Chickpea].Harvesting
              VariableNames:
                [Clock].Today
                [Chickpea].Phenology.CurrentStageName as Stage
                [Chickpea].Phenology.FloweringDAS.Value as FloweringDAS
                [Chickpea].Phenology.MaturityDAS.Value as MaturityDAS
                [Chickpea].Grain.Live.Wt as GrainWt
            Manager Harvesting: same as Validation.SE Queensland.Lawes1999.Lawes1999.Field.Harvesting
            Plant Chickpea: CropType=Chickpea
            Soil: Latitude=0; Longitude=0
              InitialWater Initial water: PercentMethod=EvenlyDistributed; FractionFull=0.8
              Water: same as Validation.SE Queensland.Hermitage1988.Hermitage1988.Field.soil.Water
              SoilWater: residueinterception=0; SummerDate=1-Nov; SummerU=6; SummerCona=2; WinterDate=1-Apr; WinterU=6; WinterCona=2; DiffusConst=40; DiffusSlope=16; Salb=0.13; CN2Bare=82; CNRed=20; CNCov=0.8; max_pond=0; Thickness=[150, 150, 300, 300, 300, 300, 300]; SWCON=[0.4, 0.4, 0.4, 0.4, 0.4, 0.4, 0.4]
              SoilNitrogen: fom_type=[default, manure, mucuna, lablab, shemp, stable]; fract_carb=[0.2, 0.3, 0.54, 0.57, 0.45, 0]; fract_cell=[0.7, 0.3, 0.37, 0.37, 0.47, 0.1]; fract_lign=[0.1, 0.4, 0.09, 0.06, 0.08, 0.9]; wfpsN2N2O_x=[22, 88]; wfpsN2N2O_y=[0.1, 1]
              SoilOrganicMatter: RootCN=80; RootWt=500; SoilCN=14.5; EnrACoeff=7.4; EnrBCoeff=0.2; OCUnits=Total
                Thickness  OC    FBiom  FInert
                150        2.2   0.02   0.36
                150        1.6   0.015  0.5
                300        1.35  0.01   0.59
                300        0.95  0.01   0.84
                300        1     0.01   0.8
                300        0.8   0.01   0.99
                300        0.8   0.01   0.99
              Analysis: Thickness=[150, 150, 300, 300, 300, 300, 300]; PH=[8.25, 8.5, 8.75, 9, 9, 9, 9]; PHUnits=Water; BoronUnits=HotWater
              Sample Initial nitrogen: NO3Units=ppm; NH4Units=ppm; SWUnits=Volumetric; OCUnits=Total; PHUnits=Water
                Thickness  NO3   NH4
                150        14.4  4.8
                150        6.58  4.2
                300        2.45  3.9
                300        1.08  3.9
                300        0.15  3.8
                300        0.83  4.1
                300        0.83  4.1
            Manager SowingRule
              SowDate = 24-Jul
              CultivarName = Amethyst
              SowingDepth = 50
              RowSpacing = 750
              Population = 6
```csharp
using System;
using Models.Core;
using Models.PMF;
using Models.Soils;
using Models.Utilities;
using APSIM.Shared.Utilities;

namespace Models
{
	[Serializable]
	public class Script : Model
	{
		[Link] Clock Clock;
		[Link] Fertiliser Fertiliser;
		[Link] Summary Summary;
		[Link] Plant Chickpea;
		[Link] Soil Soil;
		Accumulator accumulatedRain;
		
		[Description("Sowing date (d-mmm)")]
		public string SowDate { get; set; }
		[Description("Cultivar to be sown")]
		public string CultivarName { get; set; }
		[Description("Sowing depth (mm)")]
		public double SowingDepth { get; set; }
		[Description("Row spacing (mm)")]
		public double RowSpacing { get; set; }
		[Description("Plant population (/m2)")]
		public double Population { get; set; }
		
		


		[EventSubscribe("DoManagement")]
		private void OnDoManagement(object sender, EventArgs e)
		{
		
			
			if (DateUtilities.WithinDates(SowDate, Clock.Today, SowDate))
			{
				Chickpea.Sow(population: Population, cultivar: CultivarName, depth: SowingDepth, rowSpacing: RowSpacing);	
			}
		
		}
		
	}
}
```
            Manager AutoIrrigate: same as Validation.SE Queensland.Lawes1990.Lawes1990.Field.AutoIrrigate
      Experiment Bremar
        Factors
          Factor Treatment: Specifications=[SowingRule]
            Manager S1R700
              SowDate = 15-May
              CultivarName = Amethyst
              SowingDepth = 50
              RowSpacing = 700
              Population = 18
              script: same as in Validation.SE Queensland.Hermitage_92.Hermitage_92.Field.SowingRule
            Manager S1R350
              SowDate = 15-May
              CultivarName = Amethyst
              SowingDepth = 50
              RowSpacing = 350
              Population = 44
              script: same as in Validation.SE Queensland.Hermitage_92.Hermitage_92.Field.SowingRule
            Manager S2R350
              SowDate = 1-Jun
              CultivarName = Amethyst
              SowingDepth = 50
              RowSpacing = 350
              Population = 37
              script: same as in Validation.SE Queensland.Hermitage_92.Hermitage_92.Field.SowingRule
            Manager S2R700
              SowDate = 1-Jun
              CultivarName = Amethyst
              SowingDepth = 50
              RowSpacing = 700
              Population = 18
              script: same as in Validation.SE Queensland.Hermitage_92.Hermitage_92.Field.SowingRule
        Simulation Bremar: Area=0; Slope=0
          Memo: same as Validation.SE Queensland.Hermitage_92.Hermitage_92.memo
          Weather: FileName=bremar2.met
          Clock: StartDate=2003-01-01; EndDate=2003-12-30
          Summary summaryfile
          SoilArbitrator Soil Arbitrator
          Zone Field: Area=1; Slope=0
            MicroClimate: same as Validation.SE Queensland.Lawes1990.Lawes1990.Field.MicroClimate
            Irrigation
            Fertiliser
            SurfaceOrganicMatter: PoolName=wheat; type=wheat; mass=1500; standing_fraction=0; cnr=76; CriticalResidueWeight=2000; OptimumDecompTemp=20; MaxCumulativeEOS=20; CNRatioDecompCoeff=0.277; CNRatioDecompThreshold=25; TotalLeachRain=25; MinRainToLeach=10; CriticalMinimumOrganicC=0.004; DefaultCPRatio=0; DefaultStandingFraction=0; StandingExtinctCoeff=0.5; FractionFaecesAdded=0.5
              Pools:
                {PoolName=wheat, ResidueType=wheat, Mass=1500, CNRatio=76, StandingFraction=0}
              ResidueTypes ResidueTypesList: LoadFromResource=ResidueTypes
            Operations IrrigationSchedule
            Report: same as Validation.SE Queensland.Hermitage_92.Hermitage_92.Field.Report
            Report HarvestReport: EventNames=[Chickpea].Harvesting
              VariableNames:
                [Clock].Today
                [Chickpea].Phenology.CurrentStageName as Stage
                [Chickpea].Phenology.FloweringDAS.Value as FloweringDAS
                [Chickpea].Phenology.MaturityDAS.Value as MaturityDAS
                [Chickpea].Grain.Live.Wt as GrainWt
            Manager Harvesting: same as Validation.SE Queensland.Lawes1999.Lawes1999.Field.Harvesting
            Plant Chickpea: CropType=Chickpea
            Soil: Latitude=0; Longitude=0
              Water
                Thickness  BD    AirDry  LL15  DUL   SAT
                150        1.38  0.06    0.2   0.4   0.45
                150        1.38  0.18    0.2   0.4   0.45
                300        1.42  0.18    0.2   0.38  0.43
                300        1.48  0.18    0.25  0.36  0.41
                300        1.53  0.18    0.29  0.34  0.39
                300        1.53  0.18    0.34  0.34  0.39
                300        1.54  0.18    0.34  0.34  0.39
                SoilCrop ChickpeaSoil: LL=[0.2, 0.2, 0.2, 0.25, 0.29, 0.34, 0.34]; KL=[0.06, 0.06, 0.06, 0.06, 0.06, 0.06, 0.06]; XF=[1, 1, 1, 1, 1, 0, 0]
              SoilWater: residueinterception=0; SummerDate=1-Nov; SummerU=6; SummerCona=3.5; WinterDate=1-Apr; WinterU=6; WinterCona=3.5; DiffusConst=40; DiffusSlope=16; Salb=0.13; CN2Bare=73; CNRed=20; CNCov=0.8; max_pond=0; Thickness=[150, 150, 300, 300, 300, 300, 300]; SWCON=[0.3, 0.3, 0.3, 0.3, 0.3, 0.3, 0.3]
              SoilNitrogen: fom_type=[default, manure, mucuna, lablab, shemp, stable]; fract_carb=[0.2, 0.3, 0.54, 0.57, 0.45, 0]; fract_cell=[0.7, 0.3, 0.37, 0.37, 0.47, 0.1]; fract_lign=[0.1, 0.4, 0.09, 0.06, 0.08, 0.9]; wfpsN2N2O_x=[22, 88]; wfpsN2N2O_y=[0.1, 1]
              SoilOrganicMatter: RootCN=50; RootWt=1000; SoilCN=12.5; EnrACoeff=7.4; EnrBCoeff=0.2; OCUnits=Total
                Thickness  OC    FBiom  FInert
                150        1.19  0.05   0.39
                150        1.01  0.02   0.47
                300        0.45  0.015  0.52
                300        0.3   0.01   0.62
                300        0.3   0.01   0.62
                300        0.2   0.01   0.74
                300        0.16  0.01   0.83
              Analysis: Thickness=[150, 150, 300, 300, 300, 300, 300]; PH=[7.6, 7.9, 8.6, 8.7, 8.9, 8.9, 8.9]; PHUnits=Water; BoronUnits=HotWater
              Sample Initial nitrogen: NO3Units=ppm; NH4Units=ppm; SWUnits=Volumetric; OCUnits=Total; PHUnits=Water
                Thickness  NO3    NH4
                150        9.69   0.3
                150        7.88   0.05
                300        9.29   0.05
                300        17.59  0.05
                300        17.49  0.05
                300        13.16  0.05
                300        10.02  0.05
              Sample Initial water: Thickness=[150, 150, 300, 300, 300, 300, 300]; SW=[0.33, 0.36, 0.36, 0.33, 0.3, 0.28, 0.26]; NO3Units=ppm; NH4Units=ppm; SWUnits=Volumetric; OCUnits=Total; PHUnits=Water
            Manager SowingRule: same as Validation.SE Queensland.Hermitage_92.Hermitage_92.Field.SowingRule
            Manager AutoIrrigate: same as Validation.SE Queensland.Lawes1990.Lawes1990.Field.AutoIrrigate
    Folder Central Queensland
      Memo
        The data presented for the trials done in Emerald and Biloela were obtained from R Brinsmead (unpublished), as reported by Robertson et al. (2002). The two trials were sowed in four dates. The Emerald experiment was sowed at March 5th, April 13th, June 18th and September 13th. The experiment in Biloela was sowed on March 12th, April 26th, June 18th and Septemebr 13th.
      Experiment Emerald
        Factors
          Factor Sowing: Specifications=[Sowing]
            Operations 1
              1989-03-05  [Chickpea].Sow(population:13.7, cultivar:"Amethyst", depth:50, rowSpacing:350);
              1989-07-13  [Irrigation].Apply(amount:50, depth:0, efficiency:1, willRunoff:false);
              1989-08-17  [Irrigation].Apply(amount:100, depth:0, efficiency:1, willRunoff:false);
              1989-10-29  [Irrigation].Apply(amount:100, depth:0, efficiency:1, willRunoff:false);
            Operations 2
              1989-04-13  [Chickpea].Sow(population:18.6, cultivar:"Amethyst", depth:50, rowSpacing:350);
              1989-07-13  [Irrigation].Apply(amount:50, depth:0, efficiency:1, willRunoff:false);
              1989-08-17  [Irrigation].Apply(amount:100, depth:0, efficiency:1, willRunoff:false);
              1989-10-29  [Irrigation].Apply(amount:100, depth:0, efficiency:1, willRunoff:false);
            Operations 3
              1989-06-18  [Chickpea].Sow(population:18.7, cultivar:"Amethyst", depth:50, rowSpacing:350);
              1989-07-13  [Irrigation].Apply(amount:50, depth:0, efficiency:1, willRunoff:false);
              1989-08-17  [Irrigation].Apply(amount:100, depth:0, efficiency:1, willRunoff:false);
              1989-10-29  [Irrigation].Apply(amount:100, depth:0, efficiency:1, willRunoff:false);
            Operations 4
              1989-07-13  [Chickpea].Sow(population:18.8, cultivar:"Amethyst", depth:50, rowSpacing:350);
              1989-07-13  [Irrigation].Apply(amount:50, depth:0, efficiency:1, willRunoff:false);
              1989-08-17  [Irrigation].Apply(amount:100, depth:0, efficiency:1, willRunoff:false);
              1989-10-29  [Irrigation].Apply(amount:100, depth:0, efficiency:1, willRunoff:false);
        Simulation Emerald: Area=0; Slope=0
          Weather: FileName=Emer89.met
          Clock: StartDate=1989-01-01; EndDate=1989-12-31
          Summary summaryfile
          SoilArbitrator Soil Arbitrator
          Zone Field: Area=1; Slope=0
            MicroClimate: same as Validation.SE Queensland.Lawes1990.Lawes1990.Field.MicroClimate
            Irrigation
            Fertiliser
            SurfaceOrganicMatter: same as Validation.SE Queensland.Lawes1999.Lawes1999.Field.SurfaceOrganicMatter
            Operations Sowing
            Operations NRate
            Report: EventNames=[Clock].DoReport
              VariableNames:
                [Clock].Today
                [Soil].SoilWater.SW
                [Soil].SoilWater.Eo
                [Soil].SoilWater.Es
                [Soil].SoilWater.Drainage
                [Soil].SoilWater.Runoff
                [Soil].SoilWater.pond
                sum([Soil].SoilWater.SWmm) as ProfileWater
                [Soil].NO3N
                [MicroClimate].net_radn
                [MicroClimate].peta
                [MicroClimate].petr
            Soil: Latitude=0; Longitude=0
              Water
                Thickness  BD    AirDry  LL15  DUL   SAT
                150        1.35  0.04    0.14  0.25  0.35
                150        1.35  0.14    0.14  0.25  0.35
                300        1.35  0.14    0.14  0.29  0.37
                300        1.4   0.15    0.15  0.29  0.37
                SoilCrop ChickpeaSoil: LL=[0.14, 0.14, 0.14, 0.15]; KL=[0.08, 0.08, 0.08, 0.08]; XF=[1, 1, 0.5, 0.5]
              SoilWater: residueinterception=0; SummerDate=1-Nov; SummerU=6; SummerCona=2; WinterDate=1-Apr; WinterU=6; WinterCona=2; DiffusConst=40; DiffusSlope=16; Salb=0.13; CN2Bare=75; CNRed=20; CNCov=0.8; max_pond=0; Thickness=[150, 150, 300, 300]; SWCON=[0.1, 0.1, 0.1, 0.1]
              SoilNitrogen: fom_type=[default, manure, mucuna, lablab, shemp, stable]; fract_carb=[0.2, 0.3, 0.54, 0.57, 0.45, 0]; fract_cell=[0.7, 0.3, 0.37, 0.37, 0.47, 0.1]; fract_lign=[0.1, 0.4, 0.09, 0.06, 0.08, 0.9]; wfpsN2N2O_x=[22, 88]; wfpsN2N2O_y=[0.1, 1]
              SoilOrganicMatter: RootCN=80; RootWt=500; SoilCN=14.5; EnrACoeff=7.4; EnrBCoeff=0.2; OCUnits=Total
                Thickness  OC   FBiom  FInert
                150        0.8  0.05   0.39
                150        0.4  0.02   0.47
                300        0.2  0.015  0.52
                300        0.2  0.015  0.52
              Analysis: Thickness=[150, 150, 300, 300]; PH=[7.5, 8, 8, 8]; PHUnits=Water; BoronUnits=HotWater
              Sample InitialN: NO3Units=ppm; NH4Units=ppm; SWUnits=Volumetric; OCUnits=Total; PHUnits=Water
                Thickness  NO3  NH4
                150        3.9  0.6
                150        1.3  0.1
                300        1.5  0.1
                300        0.1  0.1
              Sample InitialSW: Thickness=[150, 150, 300, 300]; SW=[0.48, 0.46, 0.48, 0.48]; NO3Units=ppm; NH4Units=ppm; SWUnits=Volumetric; OCUnits=Total; PHUnits=Water
            Report HarvestReport: EventNames=[Chickpea].Harvesting
              VariableNames:
                [Clock].Today
                [Chickpea].Phenology.CurrentStageName as Stage
                [Chickpea].Phenology.FloweringDAS.Value as FloweringDAS
                [Chickpea].Phenology.MaturityDAS.Value as MaturityDAS
                [Chickpea].Grain.Live.Wt as GrainWt
            Manager Harvesting: same as Validation.SE Queensland.Lawes1990.Lawes1990.Field.Harvesting
            Plant Chickpea: CropType=Chickpea
            Manager AutoIrrigate: same as Validation.SE Queensland.Lawes1990.Lawes1990.Field.AutoIrrigate
      Experiment Biloela
        Factors
          Factor Sowing: Specifications=[Sowing]
            Operations 1
              1990-03-12  [Chickpea].Sow(population:24.79, cultivar:"Amethyst", depth:50, rowSpacing:350);
              1990-03-08  [Irrigation].Apply(amount:100, depth:0, efficiency:1, willRunoff:false);
            Operations 2
              1990-04-26  [Chickpea].Sow(population:21.35, cultivar:"Amethyst", depth:50, rowSpacing:350);
              1990-03-08  [Irrigation].Apply(amount:100, depth:0, efficiency:1, willRunoff:false);
            Operations 3
              1990-06-18  [Chickpea].Sow(population:24.43, cultivar:"Amethyst", depth:50, rowSpacing:750);
              1990-09-14  [Irrigation].Apply(amount:100, depth:0, efficiency:1, willRunoff:false);
            Operations 4
              1990-09-13  [Chickpea].Sow(population:19.18, cultivar:"Amethyst", depth:50, rowSpacing:750);
              1990-09-14  [Irrigation].Apply(amount:100, depth:0, efficiency:1, willRunoff:false);
        Simulation Biloela: Area=0; Slope=0
          Weather: FileName=biloela.met
          Clock: StartDate=1990-03-07; EndDate=1990-12-31
          Summary summaryfile
          SoilArbitrator Soil Arbitrator
          Zone Field: Area=1; Slope=0
            MicroClimate: same as Validation.SE Queensland.Lawes1990.Lawes1990.Field.MicroClimate
            Irrigation
            Fertiliser
            SurfaceOrganicMatter: same as Validation.SE Queensland.Lawes1999.Lawes1999.Field.SurfaceOrganicMatter
            Operations Sowing
            Operations NRate
            Report: EventNames=[Clock].DoReport
              VariableNames:
                [Clock].Today
                [Soil].SoilWater.SW
                [Soil].SoilWater.Eo
                [Soil].SoilWater.Es
                [Soil].SoilWater.Drainage
                [Soil].SoilWater.Runoff
                [Soil].SoilWater.pond
                sum([Soil].SoilWater.SWmm) as ProfileWater
                [Soil].NO3N
                [MicroClimate].net_radn
                [MicroClimate].peta
                [MicroClimate].petr
            Soil: Latitude=0; Longitude=0
              Water
                Thickness  BD    AirDry  LL15   DUL    SAT
                150        1.09  0.1     0.167  0.4    0.41
                150        1.27  0.167   0.167  0.42   0.43
                300        1.3   0.213   0.213  0.447  0.455
                300        1.3   0.22    0.22   0.46   0.47
                SoilCrop ChickpeaSoil: LL=[0.167, 0.167, 0.25, 0.37]; KL=[0.08, 0.06, 0.04, 0.02]; XF=[1, 1, 0.5, 0.5]
              SoilWater: same as Validation.Central Queensland.Emerald.Emerald.Field.soil.SoilWater
              SoilNitrogen: fom_type=[default, manure, mucuna, lablab, shemp, stable]; fract_carb=[0.2, 0.3, 0.54, 0.57, 0.45, 0]; fract_cell=[0.7, 0.3, 0.37, 0.37, 0.47, 0.1]; fract_lign=[0.1, 0.4, 0.09, 0.06, 0.08, 0.9]; wfpsN2N2O_x=[22, 88]; wfpsN2N2O_y=[0.1, 1]
              SoilOrganicMatter: RootCN=80; RootWt=500; SoilCN=14.5; EnrACoeff=7.4; EnrBCoeff=0.2; OCUnits=Total
                Thickness  OC   FBiom  FInert
                150        0.8  0.05   0.39
                150        0.4  0.02   0.47
                300        0.2  0.015  0.52
                300        0.2  0.015  0.52
              Analysis: Thickness=[150, 150, 300, 300]; PH=[7.5, 8, 8, 8]; PHUnits=Water; BoronUnits=HotWater
              Sample InitialN: NO3Units=ppm; NH4Units=ppm; SWUnits=Volumetric; OCUnits=Total; PHUnits=Water
                Thickness  NO3  NH4
                150        3.9  0.6
                150        1.3  0.1
                300        1.5  0.1
                300        1.5  0.1
              Sample InitialSW: Thickness=[150, 150, 300, 300]; SW=[0.4, 0.42, 0.447, 0.46]; NO3Units=ppm; NH4Units=ppm; SWUnits=Volumetric; OCUnits=Total; PHUnits=Water
            Report HarvestReport: EventNames=[Chickpea].Harvesting
              VariableNames:
                [Clock].Today
                [Chickpea].Phenology.CurrentStageName as Stage
                [Chickpea].Phenology.FloweringDAS.Value as FloweringDAS
                [Chickpea].Phenology.MaturityDAS.Value as MaturityDAS
                [Chickpea].Grain.Live.Wt as GrainWt
            Manager Harvesting: same as Validation.SE Queensland.Lawes1990.Lawes1990.Field.Harvesting
            Plant Chickpea: CropType=Chickpea
            Manager AutoIrrigate: same as Validation.SE Queensland.Lawes1990.Lawes1990.Field.AutoIrrigate
    Folder NewZealand
      Experiment Lincoln98_1
        Factors
          Factor Irrigation: Specifications=[IrrigationSchedule]
            Operations Nil
            Operations Full
              1998-11-27  [Irrigation].Apply(104);
              1998-12-08  [Irrigation].Apply(48);
              1998-12-19  [Irrigation].Apply(49);
              1998-12-30  [Irrigation].Apply(62);
              1999-01-09  [Irrigation].Apply(46);
              1999-01-20  [Irrigation].Apply(55);
              1999-02-01  [Irrigation].Apply(52);
              1999-02-12  [Irrigation].Apply(56);
              1999-02-24  [Irrigation].Apply(57);
            Operations Full_e_f
              1998-11-27  [Irrigation].Apply(104);
              1998-12-08  [Irrigation].Apply(48);
              1998-12-19  [Irrigation].Apply(49);
              1999-01-01  [Irrigation].Apply(72);
            Operations Half_e_f
              1998-11-27  [Irrigation].Apply(52);
              1998-12-08  [Irrigation].Apply(24);
              1998-12-19  [Irrigation].Apply(24.5);
              1999-01-02  [Irrigation].Apply(38);
            Operations Full_f_p
              1998-12-22  [Irrigation].Apply(37);
              1998-12-29  [Irrigation].Apply(39);
              1999-01-07  [Irrigation].Apply(47);
            Operations Half_f_p
              1998-12-25  [Irrigation].Apply(17);
              1999-01-01  [Irrigation].Apply(20);
              1999-01-10  [Irrigation].Apply(21);
            Operations Full_p_m
              1999-01-12  [Irrigation].Apply(33);
              1999-01-19  [Irrigation].Apply(30);
              1999-01-26  [Irrigation].Apply(35);
            Operations Half_p_m
              1999-01-12  [Irrigation].Apply(16);
              1999-01-19  [Irrigation].Apply(15);
              1999-01-26  [Irrigation].Apply(17);
        Simulation Lincoln98_1: Area=0; Slope=0
          Memo: same as Validation.SE Queensland.Hermitage_92.Hermitage_92.memo
          Weather: FileName=Lincoln.met
          Clock: StartDate=1998-11-01; EndDate=1999-04-15
          Summary summaryfile
          SoilArbitrator Soil Arbitrator
          Zone Field: Area=1; Slope=0
            MicroClimate: same as Validation.SE Queensland.Lawes1990.Lawes1990.Field.MicroClimate
            Irrigation
            Fertiliser
            SurfaceOrganicMatter: same as Validation.SE Queensland.Lawes1990.Lawes1990.Field.SurfaceOrganicMatter
            Operations Sowing
              1998-11-03  [Chickpea].Sow(population:50, cultivar:"Anwar", depth:50, rowSpacing:150);
            Operations IrrigationSchedule
            Report: same as Validation.SE Queensland.Hermitage_92.Hermitage_92.Field.Report
            Report HarvestReport: EventNames=[Chickpea].Harvesting
              VariableNames:
                [Clock].Today
                [Chickpea].Phenology.CurrentStageName as Stage
                [Chickpea].Phenology.FloweringDAS.Value as FloweringDAS
                [Chickpea].Phenology.MaturityDAS.Value as MaturityDAS
                [Chickpea].Grain.Live.Wt as GrainWt
                [Chickpea].Phenology.EmergenceDAS.Value as EmergenceDAS
            Manager Harvesting: same as Validation.SE Queensland.Lawes1999.Lawes1999.Field.Harvesting
            Plant Chickpea: CropType=Chickpea
            Soil Iversen 12: SoilType=Aquic Haplustept (US), Mottled Inmature Pallic (NZ); Site=Lincoln University: Iversen Field Paddock 12; NearestTown=Lincoln; Region=South East Queensland; NaturalVegetation=Grassland, mainly Qld bluegrass; Latitude=0; Longitude=0
              InitialWater Initial water: PercentMethod=FilledFromTop; FractionFull=0.87
              Water
                Thickness  BD    AirDry  LL15   DUL    SAT
                300        1.2   0.05    0.08   0.362  0.4
                100        1.3   0.05    0.156  0.311  0.4
                100        1.4   0.05    0.157  0.288  0.4
                100        1.4   0.05    0.159  0.291  0.4
                100        1.4   0.05    0.177  0.3    0.4
                100        1.45  0.05    0.187  0.31   0.4
                100        1.45  0.05    0.294  0.32   0.4
                100        1.45  0.05    0.302  0.329  0.4
                SoilCrop ChickpeaSoil: LL=[0.08, 0.08, 0.155, 0.158, 0.159, 0.177, 0.187, 0.294]; KL=[0.1, 0.09, 0.09, 0.05, 0.05, 0.04, 0.04, 0.08]; XF=[1, 1, 0.5, 0.5, 0.5, 0.5, 0.5, 0.3]
              SoilWater: residueinterception=0; SummerDate=21-Sep; SummerU=6; SummerCona=3.5; WinterDate=23-Mar; WinterU=6; WinterCona=2.5; DiffusConst=88; DiffusSlope=35; Salb=0.13; CN2Bare=73; CNRed=20; CNCov=0.8; max_pond=0; Thickness=[300, 100, 100, 100, 100, 100, 100, 100]; SWCON=[0.7, 0.7, 0.7, 0.7, 0.7, 0.7, 0.7, 0.7]
              SoilNitrogen: fom_type=[default, manure, mucuna, lablab, shemp, stable]; fract_carb=[0.2, 0.3, 0.54, 0.57, 0.45, 0]; fract_cell=[0.7, 0.3, 0.37, 0.37, 0.47, 0.1]; fract_lign=[0.1, 0.4, 0.09, 0.06, 0.08, 0.9]; wfpsN2N2O_x=[22, 88]; wfpsN2N2O_y=[0.1, 1]
              SoilOrganicMatter: RootCN=40; RootWt=1000; SoilCN=11; EnrACoeff=7.4; EnrBCoeff=0.2; OCUnits=Total
                Thickness  OC    FBiom  FInert
                300        2.7   0.03   0.4
                100        1     0.02   0.6
                100        0.45  0.01   0.7
                100        0.3   0.01   0.8
                100        0.2   0.01   0.9
                100        0.2   0.01   0.9
                100        0.2   0.01   0.9
                100        0.2   0.01   0.9
              Analysis: Thickness=[300, 100, 100, 100, 100, 100, 100, 100]; PH=[6, 6, 6, 6, 6, 6, 6, 6]; PHUnits=Water; BoronUnits=HotWater
              Sample Initial nitrogen: NO3Units=ppm; NH4Units=ppm; SWUnits=Volumetric; OCUnits=Total; PHUnits=Water
                Thickness  NO3     NH4
                300        15.491  0.093
                100        15.491  0.093
                100        15.491  0.093
                100        15.491  0.093
                100        15.491  0.093
                100        15.491  0.093
                100        15.491  0.093
                100        15.491  0.093
            Manager AutoIrrigate
              FASW = 0
              WaterDeficit = 0
              AutoIrrigationOn = False
              StartStageName = StartFlowering
              EndStageName = EndGrainFill
              FASWThreshold = 0.9
              FASWDepth = 600
              script: same as in Validation.SE Queensland.Lawes1990.Lawes1990.Field.AutoIrrigate
      Experiment Lincoln98_2
        Factors
          Factor Irrigation: Specifications=[IrrigationSchedule]
            Operations Nil
            Operations Full
              1998-12-30  [Irrigation].Apply(126);
              1999-01-09  [Irrigation].Apply(49);
              1999-01-20  [Irrigation].Apply(56);
              1999-02-01  [Irrigation].Apply(52);
              1999-02-12  [Irrigation].Apply(55);
              1999-02-24  [Irrigation].Apply(55);
              1999-03-03  [Irrigation].Apply(25);
              1999-03-12  [Irrigation].Apply(32);
              1999-03-19  [Irrigation].Apply(16);
            Operations Full_e_f
              1998-12-30  [Irrigation].Apply(126);
              1999-01-09  [Irrigation].Apply(49);
              1999-01-20  [Irrigation].Apply(56);
              1999-01-26  [Irrigation].Apply(28);
            Operations Half_e_f
              1998-12-30  [Irrigation].Apply(63);
              1999-01-09  [Irrigation].Apply(24.5);
              1999-01-22  [Irrigation].Apply(32.5);
            Operations Full_f_p
              1999-01-24  [Irrigation].Apply(32);
              1999-01-31  [Irrigation].Apply(35);
              1999-02-07  [Irrigation].Apply(31);
            Operations Half_f_p
              1999-01-24  [Irrigation].Apply(16);
              1999-01-31  [Irrigation].Apply(17.5);
              1999-02-08  [Irrigation].Apply(19);
            Operations Full_p_m
              1999-02-08  [Irrigation].Apply(36);
              1999-02-15  [Irrigation].Apply(33);
              1999-02-22  [Irrigation].Apply(33);
              1999-03-01  [Irrigation].Apply(25);
              1999-03-08  [Irrigation].Apply(28);
              1999-03-15  [Irrigation].Apply(16);
              1999-03-21  [Irrigation].Apply(19);
            Operations Half_p_m
              1999-02-07  [Irrigation].Apply(15.5);
              1999-02-14  [Irrigation].Apply(18.5);
              1999-02-21  [Irrigation].Apply(15);
              1999-02-28  [Irrigation].Apply(12.5);
              1999-03-07  [Irrigation].Apply(14.5);
              1999-03-14  [Irrigation].Apply(10);
              1999-03-20  [Irrigation].Apply(8);
        Simulation Lincoln 98: Area=0; Slope=0
          Memo: same as Validation.SE Queensland.Hermitage_92.Hermitage_92.memo
          Weather: FileName=Lincoln.met
          Clock: StartDate=1998-11-01; EndDate=1999-05-01
          Summary summaryfile
          SoilArbitrator Soil Arbitrator
          Zone Field: Area=1; Slope=0
            MicroClimate: same as Validation.SE Queensland.Lawes1990.Lawes1990.Field.MicroClimate
            Irrigation
            Fertiliser
            SurfaceOrganicMatter: same as Validation.SE Queensland.Lawes1990.Lawes1990.Field.SurfaceOrganicMatter
            Operations Sowing
              1998-12-07  [Chickpea].Sow(population:50, cultivar:"Anwar", depth:50, rowSpacing:150);
            Operations IrrigationSchedule
            Report: same as Validation.SE Queensland.Hermitage_92.Hermitage_92.Field.Report
            Report HarvestReport: EventNames=[Chickpea].Harvesting
              VariableNames:
                [Clock].Today
                [Chickpea].Phenology.CurrentStageName as Stage
                [Chickpea].Phenology.FloweringDAS.Value as FloweringDAS
                [Chickpea].Phenology.MaturityDAS.Value as MaturityDAS
                [Chickpea].Grain.Live.Wt as GrainWt
                [Chickpea].Phenology.EmergenceDAS.Value as EmergenceDAS
            Manager Harvesting: same as Validation.SE Queensland.Lawes1999.Lawes1999.Field.Harvesting
            Plant Chickpea: CropType=Chickpea
            Soil Iversen 12: SoilType=Aquic Haplustept (US), Mottled Inmature Pallic (NZ); Site=Lincoln University: Iversen Field Paddock 12; NearestTown=Lincoln; Region=South East Queensland; NaturalVegetation=Grassland, mainly Qld bluegrass; Latitude=0; Longitude=0
              InitialWater Initial water: PercentMethod=FilledFromTop; FractionFull=0.87
              Water
                Thickness  BD    AirDry  LL15  DUL    SAT
                300        1.2   0.08    0.08  0.349  0.4
                100        1.3   0.17    0.16  0.317  0.4
                100        1.4   0.17    0.16  0.302  0.4
                100        1.4   0.14    0.16  0.309  0.4
                100        1.4   0.11    0.18  0.321  0.4
                100        1.45  0.11    0.19  0.334  0.4
                100        1.45  0.11    0.29  0.336  0.4
                100        1.45  0.12    0.3   0.316  0.4
                SoilCrop ChickpeaSoil: LL=[0.109, 0.167, 0.149, 0.152, 0.191, 0.201, 0.289, 0.302]; KL=[0.1, 0.09, 0.09, 0.05, 0.05, 0.04, 0.04, 0.08]; XF=[1, 1, 0.5, 0.5, 0.5, 0.5, 0.5, 0.3]
              SoilWater: same as Validation.NewZealand.Lincoln98_1.Lincoln98_1.Field.Iversen 12.SoilWater
              SoilNitrogen: fom_type=[default, manure, mucuna, lablab, shemp, stable]; fract_carb=[0.2, 0.3, 0.54, 0.57, 0.45, 0]; fract_cell=[0.7, 0.3, 0.37, 0.37, 0.47, 0.1]; fract_lign=[0.1, 0.4, 0.09, 0.06, 0.08, 0.9]; wfpsN2N2O_x=[22, 88]; wfpsN2N2O_y=[0.1, 1]
              SoilOrganicMatter: same as Validation.NewZealand.Lincoln98_1.Lincoln98_1.Field.Iversen 12.SoilOrganicMatter
              Analysis: Thickness=[300, 100, 100, 100, 100, 100, 100, 100]; PH=[6, 6, 6, 6, 6, 6, 6, 6]; PHUnits=Water; BoronUnits=HotWater
              Sample Initial nitrogen: NO3Units=ppm; NH4Units=ppm; SWUnits=Volumetric; OCUnits=Total; PHUnits=Water
                Thickness  NO3     NH4
                300        15.491  0.093
                100        15.491  0.093
                100        15.491  0.093
                100        15.491  0.093
                100        15.491  0.093
                100        15.491  0.093
                100        15.491  0.093
                100        15.491  0.093
            Manager AutoIrrigate: same as Validation.NewZealand.Lincoln98_1.Lincoln98_1.Field.AutoIrrigate
      Experiment Lincoln99_1
        Factors
          Factor Irrigation: Specifications=[IrrigationSchedule]
            Operations Nil
            Operations Full
              1999-10-25  [Irrigation].Apply(31);
              1999-11-01  [Irrigation].Apply(27);
              1999-11-08  [Irrigation].Apply(30);
              1999-11-16  [Irrigation].Apply(32);
              1999-11-23  [Irrigation].Apply(25);
              1999-11-30  [Irrigation].Apply(29);
              1999-12-07  [Irrigation].Apply(30);
              1999-12-16  [Irrigation].Apply(45);
              1999-12-23  [Irrigation].Apply(32);
              1999-12-30  [Irrigation].Apply(33);
              2000-01-07  [Irrigation].Apply(27);
              2000-01-14  [Irrigation].Apply(33);
              2000-01-21  [Irrigation].Apply(31);
              2000-01-29  [Irrigation].Apply(34);
              2000-02-05  [Irrigation].Apply(25);
              2000-02-12  [Irrigation].Apply(32);
              2000-02-20  [Irrigation].Apply(21);
              2000-02-27  [Irrigation].Apply(32);
              2000-03-05  [Irrigation].Apply(36);
              2000-03-12  [Irrigation].Apply(26);
            Operations Full_f_p
              1999-12-18  [Irrigation].Apply(36);
              1999-12-25  [Irrigation].Apply(28);
              2000-01-01  [Irrigation].Apply(34);
              2000-01-07  [Irrigation].Apply(18);
            Operations Full_p_m
              2000-01-07  [Irrigation].Apply(22);
              2000-01-14  [Irrigation].Apply(33);
              2000-01-21  [Irrigation].Apply(31);
              2000-01-28  [Irrigation].Apply(29);
              2000-02-04  [Irrigation].Apply(26);
              2000-02-11  [Irrigation].Apply(31);
              2000-02-19  [Irrigation].Apply(23);
        Simulation Lincoln99_1: Area=0; Slope=0
          Memo
            These simulations are based on data from two years of field trials done in Lincoln, Canterbury, New Zealand from 1998 to 2000. These trials used three cultivars of Kabuli chickpeas. However the results presented here are the average of cultivars for measurements that had no differences among cultivars tested. The experimental design was a split split plot with irrigation as main plot, sowing dates as sub plots and cultivars as sub sub plots.The first season, from 1998 until 1999, had two sowing dates (3rd if November and 7th of December) and eight irrigation treatments. Treatments were nil irrigation, full irrigation from emergence to physiological maturity, full from emergence to flowering, half irrigation from emergence to flowering, full from flowering to podding, half from flowering to podding, full from podding to physiological maturity and half from podding to physiological maturity. In these treatments irrigation was applied weekly and the fully irrigated treatment applied the same amount of water lost through evapotranspiration in the previous week. The half irrigation treatment replaced half of the amount lost in the previous week.Results from this season include biomass, grain yield, pods per plant, LAI, soil volumetric water content and flowering, podding and physsiological maturity dates.The second season, from 1999 to 2000, had two sowing dates (18th of October and 22nd of November) and four irrigation treatments. These were nil irrigation, full from emergence to physiological maturity, full from flowering to podding and full from podding to physiological maturity. The results from this season do not include LAI measurements. More information about the data is available in Anwar, M.R. 2001. Water use of Kabuli chickpea (Cicer arietinum L.) cultivars in Canterbury. (PhD thesis, Lincoln University).
          Weather: FileName=Lincoln.met
          Clock: StartDate=1999-10-01; EndDate=2000-05-01
          Summary summaryfile
          SoilArbitrator Soil Arbitrator
          Zone Field: Area=1; Slope=0
            MicroClimate: same as Validation.SE Queensland.Lawes1990.Lawes1990.Field.MicroClimate
            Irrigation
            Fertiliser
            SurfaceOrganicMatter: same as Validation.SE Queensland.Lawes1990.Lawes1990.Field.SurfaceOrganicMatter
            Operations Sowing
              1999-10-18  [Chickpea].Sow(population:50, cultivar:"Anwar", depth:50, rowSpacing:150);
            Operations IrrigationSchedule
            Report: same as Validation.SE Queensland.Hermitage_92.Hermitage_92.Field.Report
            Report HarvestReport: EventNames=[Chickpea].Harvesting
              VariableNames:
                [Clock].Today
                [Chickpea].Phenology.CurrentStageName as Stage
                [Chickpea].Phenology.FloweringDAS.Value as FloweringDAS
                [Chickpea].Phenology.MaturityDAS.Value as MaturityDAS
                [Chickpea].Grain.Live.Wt as GrainWt
                [Chickpea].Phenology.EmergenceDAS.Value as EmergenceDAS
            Manager Harvesting: same as Validation.SE Queensland.Lawes1990.Lawes1990.Field.Harvesting
            Plant Chickpea: CropType=Chickpea
            Soil Iversen 12: SoilType=Aquic Haplustept (US), Mottled Inmature Pallic (NZ); Site=Lincoln University: Iversen Field Paddock 12; NearestTown=Lincoln; Region=South East Queensland; NaturalVegetation=Grassland, mainly Qld bluegrass; Latitude=0; Longitude=0
              InitialWater Initial water: PercentMethod=FilledFromTop; FractionFull=0.87
              Water
                Thickness  BD    AirDry  LL15   DUL    SAT
                300        1.2   0.08    0.165  0.353  0.4
                100        1.3   0.169   0.169  0.335  0.4
                100        1.4   0.173   0.173  0.317  0.4
                100        1.4   0.14    0.14   0.318  0.4
                100        1.4   0.114   0.114  0.329  0.4
                100        1.45  0.107   0.107  0.336  0.4
                100        1.45  0.106   0.106  0.356  0.4
                100        1.45  0.119   0.119  0.362  0.4
                100        1.45  0.12    0.12   0.352  0.4
                SoilCrop ChickpeaSoil
                  LL=[0.08, 0.101, 0.155, 0.165, 0.183, 0.266, 0.303, 0.335, 0.341]
                  KL=[1, 0.09, 0.09, 0.05, 0.05, 0.04, 0.04, 0.08, 0.08]
                  XF=[1, 1, 0.5, 0.5, 0.5, 0.5, 0.5, 0.3, 0.3]
              SoilWater: residueinterception=0; SummerDate=21-Sep; SummerU=6; SummerCona=3.5; WinterDate=23-Mar; WinterU=6; WinterCona=2.5; DiffusConst=88; DiffusSlope=35; Salb=0.13; CN2Bare=73; CNRed=20; CNCov=0.8; max_pond=0; Thickness=[300, 100, 100, 100, 100, 100, 100, 100, 100]; SWCON=[0.7, 0.7, 0.7, 0.7, 0.7, 0.7, 0.7, 0.7, 0.7]
              SoilNitrogen: fom_type=[default, manure, mucuna, lablab, shemp, stable]; fract_carb=[0.2, 0.3, 0.54, 0.57, 0.45, 0]; fract_cell=[0.7, 0.3, 0.37, 0.37, 0.47, 0.1]; fract_lign=[0.1, 0.4, 0.09, 0.06, 0.08, 0.9]; wfpsN2N2O_x=[22, 88]; wfpsN2N2O_y=[0.1, 1]
              SoilOrganicMatter: RootCN=40; RootWt=1000; SoilCN=11; EnrACoeff=7.4; EnrBCoeff=0.2; OCUnits=Total
                Thickness  OC    FBiom  FInert
                300        2.7   0.03   0.4
                100        1     0.02   0.6
                100        0.45  0.01   0.7
                100        0.3   0.01   0.8
                100        0.2   0.01   0.9
                100        0.2   0.01   0.9
                100        0.2   0.01   0.9
                100        0.2   0.01   0.9
                100        0.2   0.01   1
              Analysis: Thickness=[300, 100, 100, 100, 100, 100, 100, 100, 100]; PH=[6, 6, 6, 6, 6, 6, 6, 6, 6]; PHUnits=Water; BoronUnits=HotWater
              Sample Initial nitrogen: NO3Units=ppm; NH4Units=ppm; SWUnits=Volumetric; OCUnits=Total; PHUnits=Water
                Thickness  NO3     NH4
                300        15.491  0.093
                100        15.491  0.093
                100        15.491  0.093
                100        15.491  0.093
                100        15.491  0.093
                100        15.491  0.093
                100        15.491  0.093
                100        15.491  0.093
                100        15.491  0.093
      Experiment Lincoln99_2
        Factors
          Factor Irrigation: Specifications=[IrrigationSchedule]
            Operations Nil
            Operations Full
              1999-11-30  [Irrigation].Apply(35);
              1999-12-07  [Irrigation].Apply(32);
              1999-12-17  [Irrigation].Apply(55);
              1999-12-23  [Irrigation].Apply(29);
              1999-12-30  [Irrigation].Apply(35);
              2000-01-08  [Irrigation].Apply(33);
              2000-01-14  [Irrigation].Apply(29);
              2000-01-21  [Irrigation].Apply(31);
              2000-01-30  [Irrigation].Apply(36);
              2000-02-05  [Irrigation].Apply(24);
              2000-02-12  [Irrigation].Apply(32);
              2000-02-21  [Irrigation].Apply(26);
              2000-02-27  [Irrigation].Apply(25);
              2000-03-05  [Irrigation].Apply(33);
              2000-03-12  [Irrigation].Apply(24);
              2000-03-19  [Irrigation].Apply(20);
              2000-03-28  [Irrigation].Apply(26);
              2000-04-05  [Irrigation].Apply(20);
              2000-04-12  [Irrigation].Apply(12);
            Operations Full_f_p
              2000-01-27  [Irrigation].Apply(27);
              2000-02-03  [Irrigation].Apply(27);
              2000-02-10  [Irrigation].Apply(33);
              2000-02-14  [Irrigation].Apply(17);
            Operations Full_p_m
              2000-02-12  [Irrigation].Apply(32);
              2000-02-19  [Irrigation].Apply(17);
              2000-02-26  [Irrigation].Apply(33);
              2000-03-04  [Irrigation].Apply(29);
              2000-03-11  [Irrigation].Apply(26);
              2000-03-22  [Irrigation].Apply(32);
        Simulation Lincoln99_2: Area=0; Slope=0
          Memo: same as Validation.NewZealand.Lincoln99_1.Lincoln99_1.memo
          Weather: FileName=Lincoln.met
          Clock: StartDate=1999-10-01; EndDate=2000-05-01
          Summary summaryfile
          SoilArbitrator Soil Arbitrator
          Zone Field: Area=1; Slope=0
            MicroClimate: same as Validation.SE Queensland.Lawes1990.Lawes1990.Field.MicroClimate
            Irrigation
            Fertiliser
            SurfaceOrganicMatter: same as Validation.SE Queensland.Lawes1990.Lawes1990.Field.SurfaceOrganicMatter
            Operations Sowing
              1999-11-22  [Chickpea].Sow(population:50, cultivar:"Anwar", depth:50, rowSpacing:150);
            Operations IrrigationSchedule
            Report: same as Validation.SE Queensland.Hermitage_92.Hermitage_92.Field.Report
            Report HarvestReport: EventNames=[Chickpea].Harvesting
              VariableNames:
                [Clock].Today
                [Chickpea].Phenology.CurrentStageName as Stage
                [Chickpea].Phenology.FloweringDAS.Value as FloweringDAS
                [Chickpea].Phenology.MaturityDAS.Value as MaturityDAS
                [Chickpea].Grain.Live.Wt as GrainWt
                [Chickpea].Phenology.EmergenceDAS.Value as EmergenceDAS
            Manager Harvesting: same as Validation.SE Queensland.Lawes1990.Lawes1990.Field.Harvesting
            Plant Chickpea: CropType=Chickpea
            Soil Iversen 12: SoilType=Aquic Haplustept (US), Mottled Inmature Pallic (NZ); Site=Lincoln University: Iversen Field Paddock 12; NearestTown=Lincoln; Region=South East Queensland; NaturalVegetation=Grassland, mainly Qld bluegrass; Latitude=0; Longitude=0
              InitialWater Initial water: PercentMethod=FilledFromTop; FractionFull=0.87
              Water
                Thickness  BD    AirDry  LL15  DUL    SAT
                300        1.2   0.08    0.08  0.36   0.4
                100        1.3   0.17    0.16  0.31   0.4
                100        1.4   0.17    0.16  0.29   0.4
                100        1.4   0.14    0.16  0.29   0.4
                100        1.4   0.11    0.18  0.3    0.4
                100        1.45  0.11    0.19  0.31   0.4
                100        1.45  0.11    0.29  0.32   0.4
                100        1.45  0.12    0.3   0.33   0.4
                100        1.45  0.12    0.3   0.332  0.4
                SoilCrop ChickpeaSoil
                  LL=[0.083, 0.163, 0.169, 0.176, 0.193, 0.225, 0.294, 0.331, 0.341]
                  KL=[0.1, 0.09, 0.09, 0.05, 0.05, 0.04, 0.04, 0.08, 0.08]
                  XF=[1, 1, 0.5, 0.5, 0.5, 0.5, 0.5, 0.3, 0.2]
              SoilWater: same as Validation.NewZealand.Lincoln99_1.Lincoln99_1.Field.Iversen 12.SoilWater
              SoilNitrogen: fom_type=[default, manure, mucuna, lablab, shemp, stable]; fract_carb=[0.2, 0.3, 0.54, 0.57, 0.45, 0]; fract_cell=[0.7, 0.3, 0.37, 0.37, 0.47, 0.1]; fract_lign=[0.1, 0.4, 0.09, 0.06, 0.08, 0.9]; wfpsN2N2O_x=[22, 88]; wfpsN2N2O_y=[0.1, 1]
              SoilOrganicMatter: same as Validation.NewZealand.Lincoln99_1.Lincoln99_1.Field.Iversen 12.SoilOrganicMatter
              Analysis: Thickness=[300, 100, 100, 100, 100, 100, 100, 100, 100]; PH=[6, 6, 6, 6, 6, 6, 6, 6, 6]; PHUnits=Water; BoronUnits=HotWater
              Sample Initial nitrogen: same as Validation.NewZealand.Lincoln99_1.Lincoln99_1.Field.Iversen 12.Initial nitrogen
      Experiment Ayaz98
        Factors
          Factor Population: Specifications=[Sowing]
            Operations 5
              1998-10-30  [Chickpea].Sow(population:5, cultivar:"Ayaz", depth:50, rowSpacing:150);
            Operations 50
              1998-10-30  [Chickpea].Sow(population:55, cultivar:"Ayaz", depth:50, rowSpacing:150);
            Operations 100
              1998-10-30  [Chickpea].Sow(population:87, cultivar:"Ayaz", depth:50, rowSpacing:150);
            Operations 200
              1998-10-30  [Chickpea].Sow(population:149, cultivar:"Ayaz", depth:50, rowSpacing:150);
        Simulation Ayaz98: Area=0; Slope=0
          Memo: same as Validation.SE Queensland.Hermitage_92.Hermitage_92.memo
          Weather: FileName=Lincoln.met
          Clock: StartDate=1998-10-30; EndDate=1999-04-15
          Summary summaryfile
          SoilArbitrator Soil Arbitrator
          Zone Field: Area=1; Slope=0
            MicroClimate: same as Validation.SE Queensland.Lawes1990.Lawes1990.Field.MicroClimate
            Irrigation
            Fertiliser
            SurfaceOrganicMatter: same as Validation.SE Queensland.Lawes1990.Lawes1990.Field.SurfaceOrganicMatter
            Operations Sowing
              1998-11-03  [Chickpea].Sow(population:50, cultivar:"Amethyst", depth:50, rowSpacing:150);
            Operations IrrigationSchedule
              1998-11-18  [Irrigation].Apply(25);
              1998-12-30  [Irrigation].Apply(25);
              1999-01-15  [Irrigation].Apply(25);
            Report: same as Validation.SE Queensland.Hermitage_92.Hermitage_92.Field.Report
            Report HarvestReport: EventNames=[Chickpea].Harvesting
              VariableNames:
                [Clock].Today
                [Chickpea].Phenology.CurrentStageName as Stage
                [Chickpea].Phenology.FloweringDAS.Value as FloweringDAS
                [Chickpea].Phenology.MaturityDAS.Value as MaturityDAS
                [Chickpea].Grain.Live.Wt as GrainWt
                [Chickpea].Phenology.EmergenceDAS.Value as EmergenceDAS
            Manager Harvesting: same as Validation.SE Queensland.Lawes1999.Lawes1999.Field.Harvesting
            Plant Chickpea: CropType=Chickpea
            Soil Iversen 12: SoilType=Aquic Haplustept (US), Mottled Inmature Pallic (NZ); Site=Lincoln University: Iversen Field Paddock 12; NearestTown=Lincoln; Region=South East Queensland; NaturalVegetation=Grassland, mainly Qld bluegrass; Latitude=0; Longitude=0
              InitialWater Initial water: PercentMethod=FilledFromTop; FractionFull=0.87
              Water
                Thickness  BD    AirDry  LL15   DUL    SAT
                200        1.2   0.08    0.165  0.348  0.37
                100        1.3   0.169   0.169  0.358  0.37
                100        1.4   0.173   0.173  0.335  0.37
                100        1.4   0.14    0.14   0.317  0.37
                100        1.4   0.114   0.114  0.318  0.37
                100        1.45  0.107   0.107  0.329  0.37
                100        1.45  0.106   0.106  0.336  0.37
                100        1.45  0.119   0.119  0.356  0.37
                100        1.5   0.181   0.181  0.362  0.37
                100        1.5   0.176   0.176  0.352  0.37
                100        1.5   0.167   0.167  0.333  0.37
                100        1.55  0.152   0.152  0.303  0.37
                100        1.55  0.164   0.164  0.328  0.37
                100        1.55  0.177   0.177  0.353  0.37
                SoilCrop ChickpeaSoil
                  LL=[0.165, 0.169, 0.173, 0.14, 0.114, 0.107, 0.106, 0.119, 0.181, 0.176, 0.167, 0.152, 0.164, 0.177]
                  KL=[0.1, 0.1, 0.08, 0.06, 0.04, 0.02, 0.01, 0, 0, 0, 0, 0, 0, 0]
                  XF=[1, 1, 1, 1, 1, 1, 1, 0, 0, 0, 0, 0, 0, 0]
              SoilWater: residueinterception=0; SummerDate=21-Sep; SummerU=6; SummerCona=3.5; WinterDate=23-Mar; WinterU=6; WinterCona=2.5; DiffusConst=88; DiffusSlope=35; Salb=0.13; CN2Bare=73; CNRed=20; CNCov=0.8; max_pond=0
                Thickness=[200, 100, 100, 100, 100, 100, 100, 100, 100, 100, 100, 100, 100, 100]
                SWCON=[0.7, 0.7, 0.7, 0.7, 0.7, 0.7, 0.7, 0.7, 0.7, 0.7, 0.7, 0.7, 0.7, 0.7]
              SoilNitrogen: fom_type=[default, manure, mucuna, lablab, shemp, stable]; fract_carb=[0.2, 0.3, 0.54, 0.57, 0.45, 0]; fract_cell=[0.7, 0.3, 0.37, 0.37, 0.47, 0.1]; fract_lign=[0.1, 0.4, 0.09, 0.06, 0.08, 0.9]; wfpsN2N2O_x=[22, 88]; wfpsN2N2O_y=[0.1, 1]
              SoilOrganicMatter: RootCN=40; RootWt=1000; SoilCN=11; EnrACoeff=7.4; EnrBCoeff=0.2; OCUnits=Total
                Thickness  OC    FBiom  FInert
                200        2.7   0.03   0.4
                100        1     0.02   0.6
                100        0.45  0.01   0.7
                100        0.3   0.01   0.8
                100        0.2   0.01   0.9
                100        0.2   0.01   0.9
                100        0.2   0.01   0.9
                100        0.2   0.01   0.9
                100        0.2   0.01   1
                100        0.2   0.01   1
                100        0.2   0.01   1
                100        0.2   0.01   1
                100        0.2   0.01   1
                100        0.2   0.01   1
              Analysis: PH=[6, -, -, -, -, -, -, -, -, -, -, -, -, -]; PHUnits=Water; BoronUnits=HotWater
                Thickness=[200, 100, 100, 100, 100, 100, 100, 100, 100, 100, 100, 100, 100, 100]
              Sample Initial nitrogen: NO3Units=ppm; NH4Units=ppm; SWUnits=Volumetric; OCUnits=Total; PHUnits=Water
                Thickness  NO3     NH4
                200        15.491  0.093
                100        15.491  0.093
                100        15.491  0.093
                100        15.491  0.093
                100        15.491  0.093
                100        15.491  0.093
                100        15.491  0.093
                100        15.491  0.093
                100        15.491  0.093
                100        15.491  0.093
                100        15.491  0.093
                100        15.491  0.093
                100        15.491  0.093
                100        15.491  0.093
            Manager AutoIrrigate: same as Validation.SE Queensland.Lawes1990.Lawes1990.Field.AutoIrrigate
      Experiment Ayaz99
        Factors
          Factor Population: Specifications=[Sowing]
            Operations 10
              1999-10-21  [Chickpea].Sow(population:10, cultivar:"Ayaz", depth:50, rowSpacing:315);
            Operations 100
              1999-10-21  [Chickpea].Sow(population:98, cultivar:"Ayaz", depth:50, rowSpacing:100);
            Operations 400
              1999-10-21  [Chickpea].Sow(population:395, cultivar:"Ayaz", depth:50, rowSpacing:50);
        Simulation Ayaz99: Area=0; Slope=0
          Memo: same as Validation.SE Queensland.Hermitage_92.Hermitage_92.memo
          Weather: FileName=Lincoln.met
          Clock: StartDate=1999-10-21; EndDate=2000-04-15
          Summary summaryfile
          SoilArbitrator Soil Arbitrator
          Zone Field: Area=1; Slope=0
            MicroClimate: same as Validation.SE Queensland.Lawes1990.Lawes1990.Field.MicroClimate
            Irrigation
            Fertiliser
            SurfaceOrganicMatter: same as Validation.SE Queensland.Lawes1990.Lawes1990.Field.SurfaceOrganicMatter
            Operations Sowing
              1998-11-03  [Chickpea].Sow(population:50, cultivar:"Amethyst", depth:50, rowSpacing:150);
            Operations IrrigationSchedule
            Report: same as Validation.SE Queensland.Hermitage_92.Hermitage_92.Field.Report
            Report HarvestReport: EventNames=[Chickpea].Harvesting
              VariableNames:
                [Clock].Today
                [Chickpea].Phenology.CurrentStageName as Stage
                [Chickpea].Phenology.FloweringDAS.Value as FloweringDAS
                [Chickpea].Phenology.MaturityDAS.Value as MaturityDAS
                [Chickpea].Grain.Live.Wt as GrainWt
                [Chickpea].Phenology.EmergenceDAS.Value as EmergenceDAS
            Manager Harvesting: same as Validation.SE Queensland.Lawes1999.Lawes1999.Field.Harvesting
            Plant Chickpea: CropType=Chickpea
            Soil Iversen 12: same as Validation.NewZealand.Ayaz98.Ayaz98.Field.Iversen 12
            Manager AutoIrrigate: same as Validation.SE Queensland.Lawes1990.Lawes1990.Field.AutoIrrigate
    Folder New South Wales
      Experiment Windridge
        Factors
          Factor NRate: Specifications=[NRateSchedule]
            Operations 0
              1992-05-07  [Fertiliser].Apply(0, Fertiliser.Types.NH4NO3N, 10);
            Operations 40
              1992-05-07  [Fertiliser].Apply(40, Fertiliser.Types.NH4NO3N, 10);
            Operations 80
              1992-05-07  [Fertiliser].Apply(80, Fertiliser.Types.NH4NO3N, 10);
            Operations 120
              1992-05-07  [Fertiliser].Apply(120, Fertiliser.Types.NH4NO3N, 10);
            Operations 160
              1992-05-07  [Fertiliser].Apply(160, Fertiliser.Types.NH4NO3N, 10);
            Operations 200
              1992-05-07  [Fertiliser].Apply(200, Fertiliser.Types.NH4NO3N, 10);
        Simulation Windridge: Area=0; Slope=0
          Weather: FileName=Windr.met
          Clock: StartDate=1992-04-29; EndDate=1992-12-25
          Summary summaryfile
          SoilArbitrator Soil Arbitrator
          Zone Field: Area=1; Slope=0
            MicroClimate: same as Validation.SE Queensland.Lawes1990.Lawes1990.Field.MicroClimate
            Fertiliser
            SurfaceOrganicMatter: same as Validation.SE Queensland.Lawes1999.Lawes1999.Field.SurfaceOrganicMatter
            Operations Sowing
              1992-05-07  [Chickpea].Sow(population:40, cultivar:"Amethyst", depth:50, rowSpacing:150);
            Report: same as Validation.SE Queensland.Hermitage_92.Hermitage_92.Field.Report
            Report HarvestReport: EventNames=[Chickpea].Harvesting
              VariableNames:
                [Clock].Today
                [Chickpea].Phenology.CurrentStageName as Stage
                [Chickpea].Phenology.FloweringDAS.Value as FloweringDAS
                [Chickpea].Phenology.MaturityDAS.Value as MaturityDAS
                [Chickpea].Grain.Live.Wt as GrainWt
            Manager Harvesting: same as Validation.SE Queensland.Lawes1999.Lawes1999.Field.Harvesting
            Plant Chickpea: CropType=Chickpea
            Soil: Latitude=0; Longitude=0
              InitialWater Initial water: PercentMethod=EvenlyDistributed; FractionFull=1
              Water
                Thickness  BD   AirDry  LL15  DUL   SAT
                150        1.3  0.1     0.2   0.38  0.43
                150        1.4  0.2     0.2   0.38  0.43
                300        1.4  0.2     0.2   0.38  0.43
                300        1.4  0.2     0.2   0.37  0.42
                300        1.4  0.2     0.2   0.35  0.4
                300        1.4  0.2     0.2   0.35  0.4
                SoilCrop ChickpeaSoil: LL=[0.2, 0.22, 0.23, 0.25, 0.28, 0.3]; KL=[0.06, 0.06, 0.06, 0.05, 0.04, 0.02]; XF=[1, 1, 1, 0.5, 0, 0]
              SoilWater: residueinterception=0; SummerDate=1-Nov; SummerU=6; SummerCona=2; WinterDate=1-Apr; WinterU=6; WinterCona=2; DiffusConst=88; DiffusSlope=35.4; Salb=0.13; CN2Bare=72; CNRed=20; CNCov=0.8; max_pond=0; Thickness=[150, 150, 300, 300, 300, 300]; SWCON=[0.5, 0.5, 0.5, 0.5, 0.5, 0.5]
              SoilNitrogen: fom_type=[default, manure, mucuna, lablab, shemp, stable]; fract_carb=[0.2, 0.3, 0.54, 0.57, 0.45, 0]; fract_cell=[0.7, 0.3, 0.37, 0.37, 0.47, 0.1]; fract_lign=[0.1, 0.4, 0.09, 0.06, 0.08, 0.9]; wfpsN2N2O_x=[22, 88]; wfpsN2N2O_y=[0.1, 1]
              SoilOrganicMatter: RootCN=40; RootWt=100; SoilCN=15.86; EnrACoeff=7.4; EnrBCoeff=0.2; OCUnits=Total
                Thickness  OC    FBiom  FInert
                150        1.43  0.03   0.4
                150        0.91  0.02   0.4
                300        0.65  0.01   0.6
                300        0.26  0.01   0.8
                300        0.13  0.01   0.96
                300        0.1   0.01   0.96
              Analysis: Thickness=[150, 150, 300, 300, 300, 300]; PH=[7.62, 7.62, 7.62, 7.62, 7.62, 7.62]; PHUnits=Water; BoronUnits=HotWater
              Sample Initial nitrogen: NO3Units=ppm; NH4Units=ppm; SWUnits=Volumetric; OCUnits=Total; PHUnits=Water
                Thickness  NO3   NH4
                150        14.4  0.01
                150        6.58  0.01
                300        2.45  0.01
                300        1.08  0.01
                300        0.15  0.01
                300        0.83  0.01
            Operations NRateSchedule
              1992-05-07  [Fertiliser].Apply(0, Fertiliser.Types.NH4NO3N, 10);
            Manager AutoIrrigate: same as Validation.SE Queensland.Lawes1990.Lawes1990.Field.AutoIrrigate
            Irrigation
      Experiment Kulai_2003
        Factors
          Factor Sowing: Specifications=[SowingRule]
            Manager S1R350
              SowDate = 2-May
              CultivarName = Amethyst
              SowingDepth = 50
              RowSpacing = 350
              Population = 28.5
              script: same as in Validation.SE Queensland.Hermitage_92.Hermitage_92.Field.SowingRule
            Manager S1R700
              SowDate = 2-May
              CultivarName = Amethyst
              SowingDepth = 50
              RowSpacing = 700
              Population = 24.5
              script: same as in Validation.SE Queensland.Hermitage_92.Hermitage_92.Field.SowingRule
            Manager S2R350
              SowDate = 15-May
              CultivarName = Amethyst
              SowingDepth = 50
              RowSpacing = 350
              Population = 33
              script: same as in Validation.SE Queensland.Hermitage_92.Hermitage_92.Field.SowingRule
            Manager S2R700
              SowDate = 15-May
              CultivarName = Amethyst
              SowingDepth = 50
              RowSpacing = 700
              Population = 22
              script: same as in Validation.SE Queensland.Hermitage_92.Hermitage_92.Field.SowingRule
        Simulation Kulai_2003: Area=0; Slope=0
          Memo: same as Validation.SE Queensland.Hermitage_92.Hermitage_92.memo
          Weather: FileName=kulai2.met
          Clock: StartDate=2003-01-01; EndDate=2003-12-30
          Summary summaryfile
          SoilArbitrator Soil Arbitrator
          Zone Field: Area=1; Slope=0
            MicroClimate: same as Validation.SE Queensland.Lawes1990.Lawes1990.Field.MicroClimate
            Irrigation
            Fertiliser
            SurfaceOrganicMatter: same as Validation.SE Queensland.Bremar.Bremar.Field.SurfaceOrganicMatter
            Operations IrrigationSchedule
            Report: same as Validation.SE Queensland.Hermitage_92.Hermitage_92.Field.Report
            Report HarvestReport: EventNames=[Chickpea].Harvesting
              VariableNames:
                [Clock].Today
                [Chickpea].Phenology.CurrentStageName as Stage
                [Chickpea].Phenology.FloweringDAS.Value as FloweringDAS
                [Chickpea].Phenology.MaturityDAS.Value as MaturityDAS
                [Chickpea].Grain.Live.Wt as GrainWt
            Manager Harvesting: same as Validation.SE Queensland.Lawes1999.Lawes1999.Field.Harvesting
            Plant Chickpea: CropType=Chickpea
            Soil: Latitude=0; Longitude=0
              Water
                Thickness  BD    AirDry  LL15  DUL   SAT
                150        1.45  0.06    0.17  0.35  0.4
                150        1.43  0.16    0.17  0.34  0.39
                300        1.34  0.16    0.17  0.31  0.36
                300        1.36  0.18    0.19  0.3   0.35
                300        1.41  0.22    0.23  0.35  0.4
                300        1.61  0.25    0.26  0.37  0.39
                300        1.61  0.31    0.33  0.36  0.4
                SoilCrop ChickpeaSoil: LL=[0.18, 0.18, 0.18, 0.2, 0.24, 0.27, 0.34]; KL=[0.06, 0.06, 0.06, 0.06, 0.06, 0.06, 0.06]; XF=[1, 1, 1, 1, 0.5, 0, 0]
              SoilWater: residueinterception=0; SummerDate=1-Nov; SummerU=6; SummerCona=3.5; WinterDate=1-Apr; WinterU=6; WinterCona=3.5; DiffusConst=40; DiffusSlope=16; Salb=0.13; CN2Bare=69; CNRed=20; CNCov=0.8; max_pond=0; Thickness=[150, 150, 300, 300, 300, 300, 300]; SWCON=[0.3, 0.3, 0.3, 0.3, 0.3, 0.3, 0.3]
              SoilNitrogen: fom_type=[default, manure, mucuna, lablab, shemp, stable]; fract_carb=[0.2, 0.3, 0.54, 0.57, 0.45, 0]; fract_cell=[0.7, 0.3, 0.37, 0.37, 0.47, 0.1]; fract_lign=[0.1, 0.4, 0.09, 0.06, 0.08, 0.9]; wfpsN2N2O_x=[22, 88]; wfpsN2N2O_y=[0.1, 1]
              SoilOrganicMatter: same as Validation.SE Queensland.Bremar.Bremar.Field.soil.SoilOrganicMatter
              Analysis: Thickness=[150, 150, 300, 300, 300, 300, 300]; PH=[7.6, 7.9, 8.6, 8.7, 8.9, 8.9, 8.9]; PHUnits=Water; BoronUnits=HotWater
              Sample Initial nitrogen: NO3Units=ppm; NH4Units=ppm; SWUnits=Volumetric; OCUnits=Total; PHUnits=Water
                Thickness  NO3    NH4
                150        9.69   0.3
                150        7.88   0.05
                300        9.29   0.05
                300        17.59  0.05
                300        17.49  0.05
                300        13.16  0.05
                300        10.02  0.05
              Sample Initial water: Thickness=[150, 150, 300, 300, 300, 300, 300]; SW=[0.2, 0.24, 0.26, 0.26, 0.31, 0.33, 0.33]; NO3Units=ppm; NH4Units=ppm; SWUnits=Volumetric; OCUnits=Total; PHUnits=Water
            Manager SowingRule: same as Validation.SE Queensland.Hermitage_92.Hermitage_92.Field.SowingRule
            Manager AutoIrrigate: same as Validation.SE Queensland.Lawes1990.Lawes1990.Field.AutoIrrigate
      Experiment Kulai_2004
        Factors
          Factor Sowing: Specifications=[SowingRule]
            Manager S1R350
              SowDate = 22-May
              CultivarName = Amethyst
              SowingDepth = 50
              RowSpacing = 350
              Population = 23
              script: same as in Validation.SE Queensland.Hermitage_92.Hermitage_92.Field.SowingRule
            Manager S1R700
              SowDate = 22-May
              CultivarName = Amethyst
              SowingDepth = 50
              RowSpacing = 700
              Population = 18
              script: same as in Validation.SE Queensland.Hermitage_92.Hermitage_92.Field.SowingRule
            Manager S2R350
              SowDate = 22-Jun
              CultivarName = Amethyst
              SowingDepth = 50
              RowSpacing = 350
              Population = 17.5
              script: same as in Validation.SE Queensland.Hermitage_92.Hermitage_92.Field.SowingRule
            Manager S2R700
              SowDate = 22-Jun
              CultivarName = Amethyst
              SowingDepth = 50
              RowSpacing = 700
              Population = 13
              script: same as in Validation.SE Queensland.Hermitage_92.Hermitage_92.Field.SowingRule
        Simulation Kulai_2004: Area=0; Slope=0
          Memo: same as Validation.SE Queensland.Hermitage_92.Hermitage_92.memo
          Weather: FileName=kulai2.met
          Clock: StartDate=2004-01-01; EndDate=2004-12-30
          Summary summaryfile
          SoilArbitrator Soil Arbitrator
          Zone Field: same as Validation.New South Wales.Kulai_2003.Kulai_2003.Field
    Folder Phenology Only
      Memo
        Several minimal datasets are available with only flowering dates for a ranges of planting dates.  These are assembled here for testing of the phenology model for a range of latitudes, temperatures and sowing dates. Local soil data may not be available, but it is assumed that this is necessary when comparing only preditions of time to flowering.
      Experiment Beverley1989
        Factors
          Factor Sowing: Specifications=[Sowing]
            Operations 1
              1989-05-29  [Chickpea].Sow(population:33, cultivar:"Amethyst", depth:50, rowSpacing:350);
            Operations 2
              1989-06-16  [Chickpea].Sow(population:33, cultivar:"Amethyst", depth:50, rowSpacing:350);
            Operations 3
              1989-07-10  [Chickpea].Sow(population:33, cultivar:"Amethyst", depth:50, rowSpacing:350);
            Operations 4
              1989-07-31  [Chickpea].Sow(population:33, cultivar:"Amethyst", depth:50, rowSpacing:350);
            Operations 5
              1989-08-22  [Chickpea].Sow(population:33, cultivar:"Amethyst", depth:50, rowSpacing:350);
        Simulation Beverley: Area=0; Slope=0
          Weather: FileName=Beverley.met
          Clock: StartDate=1989-01-01; EndDate=1990-12-30
          Summary summaryfile
          SoilArbitrator Soil Arbitrator
          Zone Field: Area=1; Slope=0
            MicroClimate: same as Validation.SE Queensland.Lawes1990.Lawes1990.Field.MicroClimate
            Irrigation
            Fertiliser
            SurfaceOrganicMatter: same as Validation.SE Queensland.Lawes1990.Lawes1990.Field.SurfaceOrganicMatter
            Operations Sowing
            Operations NRate
              1985-11-08  [Fertiliser].Apply(50, Fertiliser.Types.NH4NO3N, 10);
              1985-11-29  [Fertiliser].Apply(30, Fertiliser.Types.NH4NO3N, 10);
            Report: EventNames=[Clock].DoReport
              VariableNames:
                [Clock].Today
                [Soil].SoilWater.SW
                [Soil].SoilWater.Eo
                [Soil].SoilWater.Es
                [Soil].SoilWater.Drainage
                [Soil].SoilWater.Runoff
                [Soil].SoilWater.pond
                sum([Soil].SoilWater.SWmm) as ProfileWater
                [Soil].NO3N
                [MicroClimate].net_radn
                [MicroClimate].peta
                [MicroClimate].petr
            Report HarvestReport: EventNames=[Chickpea].Harvesting
              VariableNames:
                [Clock].Today
                [Chickpea].Phenology.CurrentStageName as Stage
                [Chickpea].Phenology.FloweringDAS.Value as FloweringDAS
                [Chickpea].Phenology.MaturityDAS.Value as MaturityDAS
                [Chickpea].Grain.Live.Wt as GrainWt
            Manager Harvesting: same as Validation.SE Queensland.Lawes1990.Lawes1990.Field.Harvesting
            Plant Chickpea: CropType=Chickpea
            Soil: SoilType=sand; Site=Beverley; NearestTown=Unknown; Region=WA; NaturalVegetation=Unknown; Latitude=0; Longitude=0
              Water
                Thickness  BD    AirDry  LL15  DUL   SAT
                100        1.7   0.03    0.05  0.16  0.29
                100        1.75  0.03    0.04  0.21  0.29
                100        1.8   0.04    0.06  0.21  0.29
                100        1.85  0.04    0.1   0.22  0.29
                100        1.85  0.04    0.13  0.22  0.28
                100        1.85  0.04    0.14  0.22  0.24
                100        1.85  0.04    0.17  0.22  0.24
                200        1.85  0.04    0.17  0.22  0.24
                200        1.85  0.04    0.17  0.21  0.24
                200        1.85  0.04    0.17  0.19  0.24
                SoilCrop ChickpeaSoil
                  LL=[0.05, 0.04, 0.06, 0.06, 0.13, 0.14, 0.17, 0.17, 0.17, 0.17]
                  KL=[0.06, 0.06, 0.06, 0.06, 0.06, 0.06, 0.06, 0.06, 0.06, 0.06]
                  XF=[0.2, 0.2, 0.4, 0.4, 0.4, 0.2, 0.2, 0.2, 0.2, 0]
              SoilWater: residueinterception=0; SummerDate=1-Nov; SummerU=6; SummerCona=2; WinterDate=1-Apr; WinterU=6; WinterCona=2; DiffusConst=88; DiffusSlope=35; Salb=0.13; CN2Bare=60; CNRed=20; CNCov=0.8; max_pond=0; Thickness=[100, 100, 100, 100, 100, 100, 100, 200, 200, 200]; SWCON=[1, 1, 1, 1, 0.11, 1, 1, 1, 1, 1]
              SoilNitrogen: fom_type=[default, manure, mucuna, lablab, shemp, stable]; fract_carb=[0.2, 0.3, 0.54, 0.57, 0.45, 0]; fract_cell=[0.7, 0.3, 0.37, 0.37, 0.47, 0.1]; fract_lign=[0.1, 0.4, 0.09, 0.06, 0.08, 0.9]; wfpsN2N2O_x=[22, 88]; wfpsN2N2O_y=[0.1, 1]
              SoilOrganicMatter: RootCN=20; RootWt=1500; SoilCN=13; EnrACoeff=1; EnrBCoeff=1; OCUnits=Total
                Thickness  OC    FBiom  FInert
                100        0.81  0.04   0.1
                100        0.26  0.03   0.1
                100        0.1   0.02   0.2
                100        0.1   0.01   0.8
                100        0.1   0.01   0.9
                100        0.1   0.01   0.9
                100        0.1   0.01   0.9
                200        0.1   0.01   0.9
                200        0.1   0.01   0.9
                200        0.1   0.01   0.9
              Analysis: Thickness=[100, 100, 100, 100, 100, 100, 100, 200, 200, 200]; PH=[4.7, 4.7, 4.7, 6, 6, 6, 6, 6, 6, 6]; PHUnits=Water; BoronUnits=HotWater
              Sample Initial nitrogen: NO3Units=ppm; NH4Units=ppm; SWUnits=Volumetric; OCUnits=Total; PHUnits=Water
                Thickness  NO3  NH4
                100        4    4
                100        1    0
                100        1    0
                100        0.5  0
                100        0.5  0
                100        0.5  0
                100        0.5  0
                200        0.5  0
                200        0.5  0
                200        0.5  0
              Sample Initial water: Thickness=[100, 100, 100, 100, 100, 100, 100, 200, 200, 200]; SW=[0.12, 0.15, 0.18, 0.2, 0.2, 0.21, 0.22, 0.22, 0.21, 0.19]; NO3Units=ppm; NH4Units=ppm; SWUnits=Volumetric; OCUnits=Total; PHUnits=Water
      Experiment Kununurra1989
        Factors
          Factor Sowing: Specifications=[Sowing]
            Operations 1
              1989-05-09  [Chickpea].Sow(population:33, cultivar:"Amethyst", depth:50, rowSpacing:350);
            Operations 2
              1989-05-25  [Chickpea].Sow(population:33, cultivar:"Amethyst", depth:50, rowSpacing:350);
            Operations 3
              1989-06-12  [Chickpea].Sow(population:33, cultivar:"Amethyst", depth:50, rowSpacing:350);
            Operations 4
              1989-07-03  [Chickpea].Sow(population:33, cultivar:"Amethyst", depth:50, rowSpacing:350);
            Operations 5
              1989-07-24  [Chickpea].Sow(population:33, cultivar:"Amethyst", depth:50, rowSpacing:350);
        Simulation Kununurra: Area=0; Slope=0
          Weather: FileName=Kununurra.met
          Clock: StartDate=1989-01-01; EndDate=1990-12-30
          Summary summaryfile
          SoilArbitrator Soil Arbitrator
          Zone Field: same as Validation.Phenology Only.Beverley1989.Beverley.Field
      Experiment Ayr1989
        Factors
          Factor Sowing: Specifications=[Sowing]
            Operations 1
              1989-05-05  [Chickpea].Sow(population:33, cultivar:"Amethyst", depth:50, rowSpacing:350);
            Operations 2
              1989-06-08  [Chickpea].Sow(population:33, cultivar:"Amethyst", depth:50, rowSpacing:350);
            Operations 3
              1989-07-06  [Chickpea].Sow(population:33, cultivar:"Amethyst", depth:50, rowSpacing:350);
            Operations 4
              1989-08-08  [Chickpea].Sow(population:33, cultivar:"Amethyst", depth:50, rowSpacing:350);
        Simulation Ayr: Area=0; Slope=0
          Weather: FileName=Ayr.met
          Clock: StartDate=1989-01-01; EndDate=1990-12-30
          Summary summaryfile
          SoilArbitrator Soil Arbitrator
          Zone Field: same as Validation.Phenology Only.Beverley1989.Beverley.Field
      Experiment Tamworth1989
        Factors
          Factor Sowing: Specifications=[Sowing]
            Operations 1
              1989-05-15  [Chickpea].Sow(population:33, cultivar:"Amethyst", depth:50, rowSpacing:350);
            Operations 2
              1989-06-14  [Chickpea].Sow(population:33, cultivar:"Amethyst", depth:50, rowSpacing:350);
            Operations 3
              1989-07-17  [Chickpea].Sow(population:33, cultivar:"Amethyst", depth:50, rowSpacing:350);
            Operations 4
              1989-08-15  [Chickpea].Sow(population:33, cultivar:"Amethyst", depth:50, rowSpacing:350);
        Simulation Tamworth: Area=0; Slope=0
          Weather: FileName=Tamworth.met
          Clock: StartDate=1989-01-01; EndDate=1990-12-30
          Summary summaryfile
          SoilArbitrator Soil Arbitrator
          Zone Field: same as Validation.Phenology Only.Beverley1989.Beverley.Field
      Experiment Gorgan_2004
        Factors
          Factor CV: Specifications=[SowingRule]
            Operations Ghab3
              2004-12-06  [Chickpea].Sow(population:50, cultivar:"Ghab3", depth:50, rowSpacing:250);
            Operations 00_21C
              2004-12-06  [Chickpea].Sow(population:50, cultivar:"00_21C", depth:50, rowSpacing:250);
            Operations 00_40C
              2004-12-06  [Chickpea].Sow(population:50, cultivar:"00_40C", depth:50, rowSpacing:250);
            Operations 01_36C
              2004-12-06  [Chickpea].Sow(population:50, cultivar:"01_36C", depth:50, rowSpacing:250);
            Operations 01_61C
              2004-12-06  [Chickpea].Sow(population:50, cultivar:"01_61C", depth:50, rowSpacing:250);
            Operations 01_7C
              2004-12-06  [Chickpea].Sow(population:50, cultivar:"01_7C", depth:50, rowSpacing:250);
            Operations 02_03C
              2004-12-06  [Chickpea].Sow(population:50, cultivar:"02_03C", depth:50, rowSpacing:250);
            Operations 02_10C
              2004-12-06  [Chickpea].Sow(population:50, cultivar:"02_10C", depth:50, rowSpacing:250);
            Operations 02_23C
              2004-12-06  [Chickpea].Sow(population:50, cultivar:"02_23C", depth:50, rowSpacing:250);
            Operations 02_30C
              2004-12-06  [Chickpea].Sow(population:50, cultivar:"02_30C", depth:50, rowSpacing:250);
            Operations 02_35C
              2004-12-06  [Chickpea].Sow(population:50, cultivar:"02_35C", depth:50, rowSpacing:250);
            Operations Ghab5
              2004-12-06  [Chickpea].Sow(population:50, cultivar:"Ghab5", depth:50, rowSpacing:250);
            Operations Ghab4
              2004-12-06  [Chickpea].Sow(population:50, cultivar:"Ghab4", depth:50, rowSpacing:250);
            Operations 97_116C
              2004-12-06  [Chickpea].Sow(population:50, cultivar:"97_116C", depth:50, rowSpacing:250);
            Operations 97_118C
              2004-12-06  [Chickpea].Sow(population:50, cultivar:"97_118C", depth:50, rowSpacing:250);
            Operations 97_120C
              2004-12-06  [Chickpea].Sow(population:50, cultivar:"97_120C", depth:50, rowSpacing:250);
            Operations 97_219C
              2004-12-06  [Chickpea].Sow(population:50, cultivar:"97_219", depth:50, rowSpacing:250);
            Operations 98_106C
              2004-12-06  [Chickpea].Sow(population:50, cultivar:"98_106C", depth:50, rowSpacing:250);
            Operations 98_107C
              2004-12-06  [Chickpea].Sow(population:50, cultivar:"98_107C", depth:50, rowSpacing:250);
            Operations 98_16C
              2004-12-06  [Chickpea].Sow(population:50, cultivar:"98_16C", depth:50, rowSpacing:250);
            Operations 98_55C
              2004-12-06  [Chickpea].Sow(population:50, cultivar:"98_55C", depth:50, rowSpacing:250);
            Operations 98_79C
              2004-12-06  [Chickpea].Sow(population:50, cultivar:"98_79C", depth:50, rowSpacing:250);
            Operations 99_34C
              2004-12-06  [Chickpea].Sow(population:50, cultivar:"99_34C", depth:50, rowSpacing:250);
            Operations 99_66C
              2004-12-06  [Chickpea].Sow(population:50, cultivar:"99_66C", depth:50, rowSpacing:250);
            Operations 99_73C
              2004-12-06  [Chickpea].Sow(population:50, cultivar:"99_73C", depth:50, rowSpacing:250);
        Simulation Gorgan_2004: Area=0; Slope=0
          Weather: FileName=Gorgan.met
          Clock: StartDate=2004-12-01; EndDate=2005-07-01
          Summary summaryfile
          SoilArbitrator Soil Arbitrator
          Zone Field: Area=1; Slope=0
            MicroClimate: same as Validation.SE Queensland.Lawes1990.Lawes1990.Field.MicroClimate
            Fertiliser
            SurfaceOrganicMatter: same as Validation.SE Queensland.Lawes1999.Lawes1999.Field.SurfaceOrganicMatter
            Operations SowingRule
              1992-05-07  [Chickpea].Sow(population:40, cultivar:"Amethyst", depth:50, rowSpacing:150);
            Report: same as Validation.SE Queensland.Hermitage_92.Hermitage_92.Field.Report
            Report HarvestReport: EventNames=[Chickpea].Harvesting
              VariableNames:
                [Clock].Today
                [Chickpea].Phenology.CurrentStageName as Stage
                [Chickpea].Phenology.FloweringDAS.Value as FloweringDAS
                [Chickpea].Phenology.MaturityDAS.Value as MaturityDAS
                [Chickpea].Grain.Live.Wt as GrainWt
            Manager Harvesting: same as Validation.SE Queensland.Lawes1999.Lawes1999.Field.Harvesting
            Plant Chickpea: CropType=Chickpea
            Soil: Latitude=0; Longitude=0
              InitialWater Initial water: PercentMethod=EvenlyDistributed; FractionFull=1
              Water
                Thickness  BD   AirDry  LL15  DUL   SAT
                150        1.3  0.1     0.2   0.38  0.43
                150        1.4  0.2     0.2   0.38  0.43
                300        1.4  0.2     0.2   0.38  0.43
                300        1.4  0.2     0.2   0.37  0.42
                300        1.4  0.2     0.2   0.35  0.4
                300        1.4  0.2     0.2   0.35  0.4
                SoilCrop ChickpeaSoil: LL=[0.2, 0.22, 0.23, 0.25, 0.28, 0.3]; KL=[0.06, 0.06, 0.06, 0.05, 0.04, 0.02]; XF=[1, 1, 1, 1, 1, 1]
              SoilWater: same as Validation.New South Wales.Windridge.Windridge.Field.soil.SoilWater
              SoilNitrogen: fom_type=[default, manure, mucuna, lablab, shemp, stable]; fract_carb=[0.2, 0.3, 0.54, 0.57, 0.45, 0]; fract_cell=[0.7, 0.3, 0.37, 0.37, 0.47, 0.1]; fract_lign=[0.1, 0.4, 0.09, 0.06, 0.08, 0.9]; wfpsN2N2O_x=[22, 88]; wfpsN2N2O_y=[0.1, 1]
              SoilOrganicMatter: same as Validation.New South Wales.Windridge.Windridge.Field.soil.SoilOrganicMatter
              Analysis: Thickness=[150, 150, 300, 300, 300, 300]; PH=[7.62, 7.62, 7.62, 7.62, 7.62, 7.62]; PHUnits=Water; BoronUnits=HotWater
              Sample Initial nitrogen: NO3Units=ppm; NH4Units=ppm; SWUnits=Volumetric; OCUnits=Total; PHUnits=Water
                Thickness  NO3   NH4
                150        14.4  0.01
                150        6.58  0.01
                300        2.45  0.01
                300        1.08  0.01
                300        0.15  0.01
                300        0.83  0.01
      Experiment Gorgan_2005
        Factors
          Factor CV: Specifications=[SowingRule]
            Operations Ghab3
              2005-11-27  [Chickpea].Sow(population:50, cultivar:"Ghab3", depth:50, rowSpacing:250);
            Operations 00_21C
              2005-11-27  [Chickpea].Sow(population:50, cultivar:"00_21C", depth:50, rowSpacing:250);
            Operations 00_40C
              2005-11-27  [Chickpea].Sow(population:50, cultivar:"00_40C", depth:50, rowSpacing:250);
            Operations 01_36C
              2005-11-27  [Chickpea].Sow(population:50, cultivar:"01_36C", depth:50, rowSpacing:250);
            Operations 01_61C
              2005-11-27  [Chickpea].Sow(population:50, cultivar:"01_61C", depth:50, rowSpacing:250);
            Operations 01_7C
              2005-11-27  [Chickpea].Sow(population:50, cultivar:"01_7C", depth:50, rowSpacing:250);
            Operations 02_03C
              2005-11-27  [Chickpea].Sow(population:50, cultivar:"02_03C", depth:50, rowSpacing:250);
            Operations 02_10C
              2005-11-27  [Chickpea].Sow(population:50, cultivar:"02_10C", depth:50, rowSpacing:250);
            Operations 02_23C
              2005-11-27  [Chickpea].Sow(population:50, cultivar:"02_23C", depth:50, rowSpacing:250);
            Operations 02_30C
              2005-11-27  [Chickpea].Sow(population:50, cultivar:"02_30C", depth:50, rowSpacing:250);
            Operations 02_35C
              2005-11-27  [Chickpea].Sow(population:50, cultivar:"02_35C", depth:50, rowSpacing:250);
            Operations Ghab5
              2005-11-27  [Chickpea].Sow(population:50, cultivar:"Ghab5", depth:50, rowSpacing:250);
            Operations Ghab4
              2005-11-27  [Chickpea].Sow(population:50, cultivar:"Ghab4", depth:50, rowSpacing:250);
            Operations 97_116C
              2005-11-27  [Chickpea].Sow(population:50, cultivar:"97_116C", depth:50, rowSpacing:250);
            Operations 97_118C
              2005-11-27  [Chickpea].Sow(population:50, cultivar:"97_118C", depth:50, rowSpacing:250);
            Operations 97_120C
              2005-11-27  [Chickpea].Sow(population:50, cultivar:"97_120C", depth:50, rowSpacing:250);
            Operations 97_219C
              2005-11-27  [Chickpea].Sow(population:50, cultivar:"97_219C", depth:50, rowSpacing:250);
            Operations 98_106C
              2005-11-27  [Chickpea].Sow(population:50, cultivar:"98_106C", depth:50, rowSpacing:250);
            Operations 98_107C
              2005-11-27  [Chickpea].Sow(population:50, cultivar:"98_107C", depth:50, rowSpacing:250);
            Operations 98_16C
              2005-11-27  [Chickpea].Sow(population:50, cultivar:"98_16C", depth:50, rowSpacing:250);
            Operations 98_55C
              2005-11-27  [Chickpea].Sow(population:50, cultivar:"98_55C", depth:50, rowSpacing:250);
            Operations 98_79C
              2005-11-27  [Chickpea].Sow(population:50, cultivar:"98_79C", depth:50, rowSpacing:250);
            Operations 99_34C
              2005-11-27  [Chickpea].Sow(population:50, cultivar:"99_34C", depth:50, rowSpacing:250);
            Operations 99_66C
              2005-11-27  [Chickpea].Sow(population:50, cultivar:"99_66C", depth:50, rowSpacing:250);
            Operations 99_73C
              2005-11-27  [Chickpea].Sow(population:50, cultivar:"99_73C", depth:50, rowSpacing:250);
        Simulation Gorgan_2005: Area=0; Slope=0
          Weather: FileName=Gorgan.met
          Clock: StartDate=2005-11-01; EndDate=2006-08-01
          Summary summaryfile
          SoilArbitrator Soil Arbitrator
          Zone Field: same as Validation.Phenology Only.Gorgan_2004.Gorgan_2004.Field
      Experiment Terbol_2004
        Factors
          Factor CV: Specifications=[SowingRule]
            Operations Ghab3
              2004-11-21  [Chickpea].Sow(population:50, cultivar:"Ghab3", depth:50, rowSpacing:250);
            Operations 00_21C
              2004-11-21  [Chickpea].Sow(population:50, cultivar:"00_21C", depth:50, rowSpacing:250);
            Operations 00_40C
              2004-11-21  [Chickpea].Sow(population:50, cultivar:"00_40C", depth:50, rowSpacing:250);
            Operations 01_36C
              2004-11-21  [Chickpea].Sow(population:50, cultivar:"01_36C", depth:50, rowSpacing:250);
            Operations 01_61C
              2004-11-21  [Chickpea].Sow(population:50, cultivar:"01_61C", depth:50, rowSpacing:250);
            Operations 01_7C
              2004-11-21  [Chickpea].Sow(population:50, cultivar:"01_7C", depth:50, rowSpacing:250);
            Operations 02_03C
              2004-11-21  [Chickpea].Sow(population:50, cultivar:"02_03C", depth:50, rowSpacing:250);
            Operations 02_10C
              2004-11-21  [Chickpea].Sow(population:50, cultivar:"02_10C", depth:50, rowSpacing:250);
            Operations 02_23C
              2004-11-21  [Chickpea].Sow(population:50, cultivar:"02_23C", depth:50, rowSpacing:250);
            Operations 02_30C
              2004-11-21  [Chickpea].Sow(population:50, cultivar:"02_30C", depth:50, rowSpacing:250);
            Operations 02_35C
              2004-11-21  [Chickpea].Sow(population:50, cultivar:"02_35C", depth:50, rowSpacing:250);
            Operations Ghab5
              2004-11-21  [Chickpea].Sow(population:50, cultivar:"Ghab5", depth:50, rowSpacing:250);
            Operations Ghab4
              2004-11-21  [Chickpea].Sow(population:50, cultivar:"Ghab4", depth:50, rowSpacing:250);
            Operations 97_116C
              2004-11-21  [Chickpea].Sow(population:50, cultivar:"97_116C", depth:50, rowSpacing:250);
            Operations 97_118C
              2004-11-21  [Chickpea].Sow(population:50, cultivar:"97_118C", depth:50, rowSpacing:250);
            Operations 97_120C
              2004-11-21  [Chickpea].Sow(population:50, cultivar:"97_120C", depth:50, rowSpacing:250);
            Operations 97_219C
              2004-11-21  [Chickpea].Sow(population:50, cultivar:"97_219C", depth:50, rowSpacing:250);
            Operations 98_106C
              2004-11-21  [Chickpea].Sow(population:50, cultivar:"98_106C", depth:50, rowSpacing:250);
            Operations 98_107C
              2004-11-21  [Chickpea].Sow(population:50, cultivar:"98_107C", depth:50, rowSpacing:250);
            Operations 98_16C
              2004-11-21  [Chickpea].Sow(population:50, cultivar:"98_16C", depth:50, rowSpacing:250);
            Operations 98_55C
              2004-11-21  [Chickpea].Sow(population:50, cultivar:"98_55C", depth:50, rowSpacing:250);
            Operations 98_79C
              2004-11-21  [Chickpea].Sow(population:50, cultivar:"98_79C", depth:50, rowSpacing:250);
            Operations 99_34C
              2004-11-21  [Chickpea].Sow(population:50, cultivar:"99_34C", depth:50, rowSpacing:250);
            Operations 99_66C
              2004-11-21  [Chickpea].Sow(population:50, cultivar:"99_66C", depth:50, rowSpacing:250);
            Operations 99_73C
              2004-11-21  [Chickpea].Sow(population:50, cultivar:"99_73C", depth:50, rowSpacing:250);
        Simulation Terbol_2004: Area=0; Slope=0
          Weather: FileName=Terbol.met
          Clock: StartDate=2004-11-01; EndDate=2005-07-01
          Summary summaryfile
          SoilArbitrator Soil Arbitrator
          Zone Field: Area=1; Slope=0
            MicroClimate: same as Validation.SE Queensland.Lawes1990.Lawes1990.Field.MicroClimate
            Fertiliser
            SurfaceOrganicMatter: same as Validation.SE Queensland.Lawes1999.Lawes1999.Field.SurfaceOrganicMatter
            Operations SowingRule
              1992-05-07  [Chickpea].Sow(population:40, cultivar:"Amethyst", depth:50, rowSpacing:150);
            Report: same as Validation.SE Queensland.Hermitage_92.Hermitage_92.Field.Report
            Report HarvestReport: EventNames=[Chickpea].Harvesting
              VariableNames:
                [Clock].Today
                [Chickpea].Phenology.CurrentStageName as Stage
                [Chickpea].Phenology.FloweringDAS.Value as FloweringDAS
                [Chickpea].Phenology.MaturityDAS.Value as MaturityDAS
                [Chickpea].Grain.Live.Wt as GrainWt
            Manager Harvesting: same as Validation.SE Queensland.Lawes1999.Lawes1999.Field.Harvesting
            Plant Chickpea: CropType=Chickpea
            Soil WI_VRLB006: SoilType=Calcic Vertisol (VRk); Country=Lebanon; Latitude=33.675; Longitude=35.842
              DataSource=Romero, C.C., Hoogenboom, G., Baigorria, G.A., Koo, J., Gijsman, A.J., Wood, S., 2012. Reanalysis of a global soil database for crop and environmental modeling. Environmental Modelling & Software 35, 163-170.  https://harvestchoice.wufoo.com/forms/download-wisol.
              Comments=You will need to add crops to this soil before running simulations.
              Water
                Thickness  BD    AirDry  LL15   DUL    SAT
                200        1.36  0.07    0.213  0.351  0.471
                300        1.38  0.07    0.215  0.353  0.463
                600        1.4   0.07    0.215  0.353  0.457
                800        1.26  0.1     0.291  0.437  0.508
                SoilCrop ChickpeaSoil: LL=[0.2, 0.23, 0.25, 0.28]; KL=[0.06, 0.06, 0.05, 0.04]; XF=[1, 1, 1, 1]
              SoilWater: residueinterception=0; SummerDate=1-Apr; SummerU=6.86; SummerCona=3; WinterDate=1-Nov; WinterU=6.86; WinterCona=3; DiffusConst=0; DiffusSlope=0; Salb=0.13; CN2Bare=75; CNRed=0; CNCov=0; max_pond=0; Thickness=[200, 300, 600, 800]; SWCON=[0.5, 0.5, 0.5, 0.5]
              SoilNitrogen: fom_type=[default, manure, mucuna, lablab, shemp, stable]; fract_carb=[0.2, 0.3, 0.54, 0.57, 0.45, 0]; fract_cell=[0.7, 0.3, 0.37, 0.37, 0.47, 0.1]; fract_lign=[0.1, 0.4, 0.09, 0.06, 0.08, 0.9]; wfpsN2N2O_x=[22, 88]; wfpsN2N2O_y=[0.1, 1]
              SoilOrganicMatter: RootCN=40; RootWt=500; SoilCN=14; EnrACoeff=0; EnrBCoeff=0; OCUnits=Total
                Thickness  OC    FBiom  FInert
                200        0.33  0.02   0.4
                300        0.26  0.02   0.8
                600        0.19  0.01   0.99
                800        0.19  0.01   0.99
              Analysis: Thickness=[200, 300, 600, 800]; PH=[6.7, 6.7, 6.8, 7.5]; PHUnits=Water; BoronUnits=HotWater
              InitialWater Initial Water: PercentMethod=FilledFromTop; FractionFull=1
              Sample Initial nitrogen: NO3Units=ppm; NH4Units=ppm; SWUnits=Volumetric; OCUnits=Total; PHUnits=Water
                Thickness  NO3  NH4
                200        0.1  0.1
                300        0.1  0.1
                600        0.1  0.1
                800        0.1  0.1
      Experiment Terbol_2005
        Factors
          Factor CV: Specifications=[SowingRule]
            Operations Ghab3
              2005-03-09  [Chickpea].Sow(population:50, cultivar:"Ghab3", depth:50, rowSpacing:250);
            Operations 00_21C
              2005-03-09  [Chickpea].Sow(population:50, cultivar:"00_21C", depth:50, rowSpacing:250);
            Operations 00_40C
              2005-03-09  [Chickpea].Sow(population:50, cultivar:"00_40C", depth:50, rowSpacing:250);
            Operations 01_36C
              2005-03-09  [Chickpea].Sow(population:50, cultivar:"01_36C", depth:50, rowSpacing:250);
            Operations 01_61C
              2005-03-09  [Chickpea].Sow(population:50, cultivar:"01_61C", depth:50, rowSpacing:250);
            Operations 01_7C
              2005-03-09  [Chickpea].Sow(population:50, cultivar:"01_7C", depth:50, rowSpacing:250);
            Operations 02_03C
              2005-03-09  [Chickpea].Sow(population:50, cultivar:"02_03C", depth:50, rowSpacing:250);
            Operations 02_10C
              2005-03-09  [Chickpea].Sow(population:50, cultivar:"02_10C", depth:50, rowSpacing:250);
            Operations 02_23C
              2005-03-09  [Chickpea].Sow(population:50, cultivar:"02_23C", depth:50, rowSpacing:250);
            Operations 02_30C
              2005-03-09  [Chickpea].Sow(population:50, cultivar:"02_30C", depth:50, rowSpacing:250);
            Operations 02_35C
              2005-03-09  [Chickpea].Sow(population:50, cultivar:"02_35C", depth:50, rowSpacing:250);
            Operations Ghab5
              2005-03-09  [Chickpea].Sow(population:50, cultivar:"Ghab5", depth:50, rowSpacing:250);
            Operations Ghab4
              2005-03-09  [Chickpea].Sow(population:50, cultivar:"Ghab4", depth:50, rowSpacing:250);
            Operations 97_116C
              2005-03-09  [Chickpea].Sow(population:50, cultivar:"97_116C", depth:50, rowSpacing:250);
            Operations 97_118C
              2005-03-09  [Chickpea].Sow(population:50, cultivar:"97_118C", depth:50, rowSpacing:250);
            Operations 97_120C
              2005-03-09  [Chickpea].Sow(population:50, cultivar:"97_120C", depth:50, rowSpacing:250);
            Operations 97_219C
              2005-03-09  [Chickpea].Sow(population:50, cultivar:"97_219C", depth:50, rowSpacing:250);
            Operations 98_106C
              2005-03-09  [Chickpea].Sow(population:50, cultivar:"98_106C", depth:50, rowSpacing:250);
            Operations 98_107C
              2005-03-09  [Chickpea].Sow(population:50, cultivar:"98_107C", depth:50, rowSpacing:250);
            Operations 98_16C
              2005-03-09  [Chickpea].Sow(population:50, cultivar:"98_16C", depth:50, rowSpacing:250);
            Operations 98_55C
              2005-03-09  [Chickpea].Sow(population:50, cultivar:"98_55C", depth:50, rowSpacing:250);
            Operations 98_79C
              2005-03-09  [Chickpea].Sow(population:50, cultivar:"98_79C", depth:50, rowSpacing:250);
            Operations 99_34C
              2005-03-09  [Chickpea].Sow(population:50, cultivar:"99_34C", depth:50, rowSpacing:250);
            Operations 99_66C
              2005-03-09  [Chickpea].Sow(population:50, cultivar:"99_66C", depth:50, rowSpacing:250);
            Operations 99_73C
              2005-03-09  [Chickpea].Sow(population:50, cultivar:"99_73C", depth:50, rowSpacing:250);
        Simulation Terbol_2005: Area=0; Slope=0
          Weather: FileName=Terbol.met
          Clock: StartDate=2005-03-01; EndDate=2006-09-01
          Summary summaryfile
          SoilArbitrator Soil Arbitrator
          Zone Field: same as Validation.Phenology Only.Terbol_2004.Terbol_2004.Field
      Experiment Terbol_2006
        Factors
          Factor CV: Specifications=[SowingRule]
            Operations Ghab3
              2006-03-03  [Chickpea].Sow(population:50, cultivar:"Ghab3", depth:50, rowSpacing:250);
            Operations 00_21C
              2006-03-03  [Chickpea].Sow(population:50, cultivar:"00_21C", depth:50, rowSpacing:250);
            Operations 00_40C
              2006-03-03  [Chickpea].Sow(population:50, cultivar:"00_40C", depth:50, rowSpacing:250);
            Operations 01_36C
              2006-03-03  [Chickpea].Sow(population:50, cultivar:"01_36C", depth:50, rowSpacing:250);
            Operations 01_61C
              2006-03-03  [Chickpea].Sow(population:50, cultivar:"01_61C", depth:50, rowSpacing:250);
            Operations 01_7C
              2006-03-03  [Chickpea].Sow(population:50, cultivar:"01_7C", depth:50, rowSpacing:250);
            Operations 02_03C
              2006-03-03  [Chickpea].Sow(population:50, cultivar:"02_03C", depth:50, rowSpacing:250);
            Operations 02_10C
              2006-03-03  [Chickpea].Sow(population:50, cultivar:"02_10C", depth:50, rowSpacing:250);
            Operations 02_23C
              2006-03-03  [Chickpea].Sow(population:50, cultivar:"02_23C", depth:50, rowSpacing:250);
            Operations 02_30C
              2006-03-03  [Chickpea].Sow(population:50, cultivar:"02_30C", depth:50, rowSpacing:250);
            Operations 02_35C
              2006-03-03  [Chickpea].Sow(population:50, cultivar:"02_35C", depth:50, rowSpacing:250);
            Operations Ghab5
              2006-03-03  [Chickpea].Sow(population:50, cultivar:"Ghab5", depth:50, rowSpacing:250);
            Operations Ghab4
              2006-03-03  [Chickpea].Sow(population:50, cultivar:"Ghab4", depth:50, rowSpacing:250);
            Operations 97_116C
              2006-03-03  [Chickpea].Sow(population:50, cultivar:"97_116C", depth:50, rowSpacing:250);
            Operations 97_118C
              2006-03-03  [Chickpea].Sow(population:50, cultivar:"97_118C", depth:50, rowSpacing:250);
            Operations 97_120C
              2006-03-03  [Chickpea].Sow(population:50, cultivar:"97_120C", depth:50, rowSpacing:250);
            Operations 97_219C
              2006-03-03  [Chickpea].Sow(population:50, cultivar:"97_219C", depth:50, rowSpacing:250);
            Operations 98_106C
              2006-03-03  [Chickpea].Sow(population:50, cultivar:"98_106C", depth:50, rowSpacing:250);
            Operations 98_107C
              2006-03-03  [Chickpea].Sow(population:50, cultivar:"98_107C", depth:50, rowSpacing:250);
            Operations 98_16C
              2006-03-03  [Chickpea].Sow(population:50, cultivar:"98_16C", depth:50, rowSpacing:250);
            Operations 98_55C
              2006-03-03  [Chickpea].Sow(population:50, cultivar:"98_55C", depth:50, rowSpacing:250);
            Operations 98_79C
              2006-03-03  [Chickpea].Sow(population:50, cultivar:"98_79C", depth:50, rowSpacing:250);
            Operations 99_34C
              2006-03-03  [Chickpea].Sow(population:50, cultivar:"99_34C", depth:50, rowSpacing:250);
            Operations 99_66C
              2006-03-03  [Chickpea].Sow(population:50, cultivar:"99_66C", depth:50, rowSpacing:250);
            Operations 99_73C
              2006-03-03  [Chickpea].Sow(population:50, cultivar:"99_73C", depth:50, rowSpacing:250);
        Simulation Terbol_2006: Area=0; Slope=0
          Weather: FileName=Terbol.met
          Clock: StartDate=2006-03-01; EndDate=2006-07-20
          Summary summaryfile
          SoilArbitrator Soil Arbitrator
          Zone Field: same as Validation.Phenology Only.Terbol_2004.Terbol_2004.Field
      Experiment Elvas_2004
        Factors
          Factor CV: Specifications=[SowingRule]
            Operations Ghab3
              2004-11-17  [Chickpea].Sow(population:50, cultivar:"Ghab3", depth:50, rowSpacing:250);
            Operations 00_21C
              2004-11-17  [Chickpea].Sow(population:50, cultivar:"00_21C", depth:50, rowSpacing:250);
            Operations 00_40C
              2004-11-17  [Chickpea].Sow(population:50, cultivar:"00_40C", depth:50, rowSpacing:250);
            Operations 01_36C
              2004-11-17  [Chickpea].Sow(population:50, cultivar:"01_36C", depth:50, rowSpacing:250);
            Operations 01_61C
              2004-11-17  [Chickpea].Sow(population:50, cultivar:"01_61C", depth:50, rowSpacing:250);
            Operations 01_7C
              2004-11-17  [Chickpea].Sow(population:50, cultivar:"01_7C", depth:50, rowSpacing:250);
            Operations 02_03C
              2004-11-17  [Chickpea].Sow(population:50, cultivar:"02_03C", depth:50, rowSpacing:250);
            Operations 02_10C
              2004-11-17  [Chickpea].Sow(population:50, cultivar:"02_10C", depth:50, rowSpacing:250);
            Operations 02_23C
              2004-11-17  [Chickpea].Sow(population:50, cultivar:"02_23C", depth:50, rowSpacing:250);
            Operations 02_30C
              2004-11-17  [Chickpea].Sow(population:50, cultivar:"02_30C", depth:50, rowSpacing:250);
            Operations 02_35C
              2004-11-17  [Chickpea].Sow(population:50, cultivar:"02_35C", depth:50, rowSpacing:250);
            Operations Ghab5
              2004-11-17  [Chickpea].Sow(population:50, cultivar:"Ghab5", depth:50, rowSpacing:250);
            Operations Ghab4
              2004-11-17  [Chickpea].Sow(population:50, cultivar:"Ghab4", depth:50, rowSpacing:250);
            Operations 97_116C
              2004-11-17  [Chickpea].Sow(population:50, cultivar:"97_116C", depth:50, rowSpacing:250);
            Operations 97_118C
              2004-11-17  [Chickpea].Sow(population:50, cultivar:"97_118C", depth:50, rowSpacing:250);
            Operations 97_120C
              2004-11-17  [Chickpea].Sow(population:50, cultivar:"97_120C", depth:50, rowSpacing:250);
            Operations 97_219C
              2004-11-17  [Chickpea].Sow(population:50, cultivar:"97_219C", depth:50, rowSpacing:250);
            Operations 98_106C
              2004-11-17  [Chickpea].Sow(population:50, cultivar:"98_106C", depth:50, rowSpacing:250);
            Operations 98_107C
              2004-11-17  [Chickpea].Sow(population:50, cultivar:"98_107C", depth:50, rowSpacing:250);
            Operations 98_16C
              2004-11-17  [Chickpea].Sow(population:50, cultivar:"98_16C", depth:50, rowSpacing:250);
            Operations 98_55C
              2004-11-17  [Chickpea].Sow(population:50, cultivar:"98_55C", depth:50, rowSpacing:250);
            Operations 98_79C
              2004-11-17  [Chickpea].Sow(population:50, cultivar:"98_79C", depth:50, rowSpacing:250);
            Operations 99_34C
              2004-11-17  [Chickpea].Sow(population:50, cultivar:"99_34C", depth:50, rowSpacing:250);
            Operations 99_66C
              2004-11-17  [Chickpea].Sow(population:50, cultivar:"99_66C", depth:50, rowSpacing:250);
            Operations 99_73C
              2004-11-17  [Chickpea].Sow(population:50, cultivar:"99_73C", depth:50, rowSpacing:250);
        Simulation Elvas_2004: Area=0; Slope=0
          Weather: FileName=Elvas.met
          Clock: StartDate=2004-11-01; EndDate=2005-09-01
          Summary summaryfile
          SoilArbitrator Soil Arbitrator
          Zone Field: Area=1; Slope=0
            MicroClimate: same as Validation.SE Queensland.Lawes1990.Lawes1990.Field.MicroClimate
            Fertiliser
            SurfaceOrganicMatter: same as Validation.SE Queensland.Lawes1999.Lawes1999.Field.SurfaceOrganicMatter
            Operations SowingRule
              1992-05-07  [Chickpea].Sow(population:40, cultivar:"Amethyst", depth:50, rowSpacing:150);
            Report: same as Validation.SE Queensland.Hermitage_92.Hermitage_92.Field.Report
            Report HarvestReport: EventNames=[Chickpea].Harvesting
              VariableNames:
                [Clock].Today
                [Chickpea].Phenology.CurrentStageName as Stage
                [Chickpea].Phenology.FloweringDAS.Value as FloweringDAS
                [Chickpea].Phenology.MaturityDAS.Value as MaturityDAS
                [Chickpea].Grain.Live.Wt as GrainWt
            Manager Harvesting: same as Validation.SE Queensland.Lawes1999.Lawes1999.Field.Harvesting
            Plant Chickpea: CropType=Chickpea
            Soil WI_LVPT007: SoilType=Calcic Luvisol (LVk); Country=Portugal; Latitude=38.083; Longitude=-7.583
              DataSource=Romero, C.C., Hoogenboom, G., Baigorria, G.A., Koo, J., Gijsman, A.J., Wood, S., 2012. Reanalysis of a global soil database for crop and environmental modeling. Environmental Modelling & Software 35, 163-170.  https://harvestchoice.wufoo.com/forms/download-wisol.
              Comments=You will need to add crops to this soil before running simulations.
              Water
                Thickness  BD    AirDry  LL15   DUL    SAT
                220        1.53  0.07    0.198  0.29   0.391
                280        1.45  0.07    0.211  0.313  0.437
                150        1.4   0.04    0.122  0.287  0.447
                SoilCrop ChickpeaSoil: LL=[0.2, 0.23, 0.25]; KL=[0.06, 0.06, 0.05]; XF=[1, 1, 1]
              SoilWater: residueinterception=0; SummerDate=1-Apr; SummerU=9.44; SummerCona=3; WinterDate=1-Nov; WinterU=9.44; WinterCona=3; DiffusConst=0; DiffusSlope=0; Salb=0.13; CN2Bare=75; CNRed=0; CNCov=0; max_pond=0; Thickness=[220, 280, 150]; SWCON=[0.5, 0.5, 0.5]
              SoilNitrogen: fom_type=[default, manure, mucuna, lablab, shemp, stable]; fract_carb=[0.2, 0.3, 0.54, 0.57, 0.45, 0]; fract_cell=[0.7, 0.3, 0.37, 0.37, 0.47, 0.1]; fract_lign=[0.1, 0.4, 0.09, 0.06, 0.08, 0.9]; wfpsN2N2O_x=[22, 88]; wfpsN2N2O_y=[0.1, 1]
              SoilOrganicMatter: RootCN=40; RootWt=500; SoilCN=14; EnrACoeff=0; EnrBCoeff=0; OCUnits=Total
                Thickness  OC   FBiom  FInert
                220        0.2  0.02   0.4
                280        0.2  0.02   0.8
                150        0.1  0.01   0.99
              Analysis: Thickness=[220, 280, 150]; PH=[8.2, 6.9, 8.6]; PHUnits=Water; BoronUnits=HotWater
              InitialWater Initial Water: PercentMethod=FilledFromTop; FractionFull=1
              Sample Initial nitrogen: NO3Units=ppm; NH4Units=ppm; SWUnits=Volumetric; OCUnits=Total; PHUnits=Water
                Thickness  NO3  NH4
                220        0.1  0.1
                280        0.1  0.1
                150        0.1  0.1
      Experiment Elvas_2005
        Factors
          Factor CV: Specifications=[SowingRule]
            Operations Ghab3
              2005-11-18  [Chickpea].Sow(population:50, cultivar:"Ghab3", depth:50, rowSpacing:250);
            Operations 00_21C
              2005-11-18  [Chickpea].Sow(population:50, cultivar:"00_21C", depth:50, rowSpacing:250);
            Operations 00_40C
              2005-11-18  [Chickpea].Sow(population:50, cultivar:"00_40C", depth:50, rowSpacing:250);
            Operations 01_36C
              2005-11-18  [Chickpea].Sow(population:50, cultivar:"01_36C", depth:50, rowSpacing:250);
            Operations 01_61C
              2005-11-18  [Chickpea].Sow(population:50, cultivar:"01_61C", depth:50, rowSpacing:250);
            Operations 01_7C
              2005-11-18  [Chickpea].Sow(population:50, cultivar:"01_7C", depth:50, rowSpacing:250);
            Operations 02_03C
              2005-11-18  [Chickpea].Sow(population:50, cultivar:"02_03C", depth:50, rowSpacing:250);
            Operations 02_10C
              2005-11-18  [Chickpea].Sow(population:50, cultivar:"02_10C", depth:50, rowSpacing:250);
            Operations 02_23C
              2005-11-18  [Chickpea].Sow(population:50, cultivar:"02_23C", depth:50, rowSpacing:250);
            Operations 02_30C
              2005-11-18  [Chickpea].Sow(population:50, cultivar:"02_30C", depth:50, rowSpacing:250);
            Operations 02_35C
              2005-11-18  [Chickpea].Sow(population:50, cultivar:"02_35C", depth:50, rowSpacing:250);
            Operations Ghab5
              2005-11-18  [Chickpea].Sow(population:50, cultivar:"Ghab5", depth:50, rowSpacing:250);
            Operations Ghab4
              2005-11-18  [Chickpea].Sow(population:50, cultivar:"Ghab4", depth:50, rowSpacing:250);
            Operations 97_116C
              2005-11-18  [Chickpea].Sow(population:50, cultivar:"97_116C", depth:50, rowSpacing:250);
            Operations 97_118C
              2005-11-18  [Chickpea].Sow(population:50, cultivar:"97_118C", depth:50, rowSpacing:250);
            Operations 97_120C
              2005-11-18  [Chickpea].Sow(population:50, cultivar:"97_120C", depth:50, rowSpacing:250);
            Operations 97_219C
              2005-11-18  [Chickpea].Sow(population:50, cultivar:"97_219C", depth:50, rowSpacing:250);
            Operations 98_106C
              2005-11-18  [Chickpea].Sow(population:50, cultivar:"98_106C", depth:50, rowSpacing:250);
            Operations 98_107C
              2005-11-18  [Chickpea].Sow(population:50, cultivar:"98_107C", depth:50, rowSpacing:250);
            Operations 98_16C
              2005-11-18  [Chickpea].Sow(population:50, cultivar:"98_16C", depth:50, rowSpacing:250);
            Operations 98_55C
              2005-11-18  [Chickpea].Sow(population:50, cultivar:"98_55C", depth:50, rowSpacing:250);
            Operations 98_79C
              2005-11-18  [Chickpea].Sow(population:50, cultivar:"98_79C", depth:50, rowSpacing:250);
            Operations 99_34C
              2005-11-18  [Chickpea].Sow(population:50, cultivar:"99_34C", depth:50, rowSpacing:250);
            Operations 99_66C
              2005-11-18  [Chickpea].Sow(population:50, cultivar:"99_66C", depth:50, rowSpacing:250);
            Operations 99_73C
              2005-11-18  [Chickpea].Sow(population:50, cultivar:"99_73C", depth:50, rowSpacing:250);
        Simulation Elvas_2005: Area=0; Slope=0
          Weather: FileName=Elvas.met
          Clock: StartDate=2005-11-01; EndDate=2006-08-01
          Summary summaryfile
          SoilArbitrator Soil Arbitrator
          Zone Field: same as Validation.Phenology Only.Elvas_2004.Elvas_2004.Field
    Folder Iran
      Experiment Gorgan03
        Factors
          Factor Treatment: Specifications=[SowingRule]
            Manager S1PD1
              SowDate = 5-Jan
              CultivarName = Hashem
              SowingDepth = 50
              RowSpacing = 250
              Population = 15
              script: same as in Validation.SE Queensland.Hermitage_92.Hermitage_92.Field.SowingRule
            Manager S1PD2
              SowDate = 5-Jan
              CultivarName = Hashem
              SowingDepth = 50
              RowSpacing = 250
              Population = 30
              script: same as in Validation.SE Queensland.Hermitage_92.Hermitage_92.Field.SowingRule
            Manager S1PD3
              SowDate = 5-Jan
              CultivarName = Hashem
              SowingDepth = 50
              RowSpacing = 250
              Population = 45
              script: same as in Validation.SE Queensland.Hermitage_92.Hermitage_92.Field.SowingRule
            Manager S1PD4
              SowDate = 5-Jan
              CultivarName = Hashem
              SowingDepth = 50
              RowSpacing = 250
              Population = 60
              script: same as in Validation.SE Queensland.Hermitage_92.Hermitage_92.Field.SowingRule
            Manager S2PD1
              SowDate = 6-mar
              CultivarName = Hashem
              SowingDepth = 50
              RowSpacing = 250
              Population = 15
              script: same as in Validation.SE Queensland.Hermitage_92.Hermitage_92.Field.SowingRule
            Manager S2PD2
              SowDate = 6-mar
              CultivarName = Hashem
              SowingDepth = 50
              RowSpacing = 250
              Population = 30
              script: same as in Validation.SE Queensland.Hermitage_92.Hermitage_92.Field.SowingRule
            Manager S2PD3
              SowDate = 6-mar
              CultivarName = Hashem
              SowingDepth = 50
              RowSpacing = 250
              Population = 45
              script: same as in Validation.SE Queensland.Hermitage_92.Hermitage_92.Field.SowingRule
            Manager S2PD4
              SowDate = 6-mar
              CultivarName = Hashem
              SowingDepth = 50
              RowSpacing = 250
              Population = 60
              script: same as in Validation.SE Queensland.Hermitage_92.Hermitage_92.Field.SowingRule
            Manager S3PD1
              SowDate = 28-apr
              CultivarName = Hashem
              SowingDepth = 50
              RowSpacing = 250
              Population = 15
              script: same as in Validation.SE Queensland.Hermitage_92.Hermitage_92.Field.SowingRule
            Manager S3PD2
              SowDate = 28-apr
              CultivarName = Hashem
              SowingDepth = 50
              RowSpacing = 250
              Population = 30
              script: same as in Validation.SE Queensland.Hermitage_92.Hermitage_92.Field.SowingRule
            Manager S3PD3
              SowDate = 28-apr
              CultivarName = Hashem
              SowingDepth = 50
              RowSpacing = 250
              Population = 45
              script: same as in Validation.SE Queensland.Hermitage_92.Hermitage_92.Field.SowingRule
            Manager S3PD4
              SowDate = 28-apr
              CultivarName = Hashem
              SowingDepth = 50
              RowSpacing = 250
              Population = 60
              script: same as in Validation.SE Queensland.Hermitage_92.Hermitage_92.Field.SowingRule
        Simulation Soltani_2: Area=0; Slope=0
          Memo: same as Validation.SE Queensland.Hermitage_92.Hermitage_92.memo
          Weather: FileName=Gorgan.met
          Clock: StartDate=2003-01-01; EndDate=2003-12-30
          Summary summaryfile
          SoilArbitrator Soil Arbitrator
          Zone Field: Area=1; Slope=0
            MicroClimate: same as Validation.SE Queensland.Lawes1990.Lawes1990.Field.MicroClimate
            Irrigation
            Fertiliser
            SurfaceOrganicMatter: same as Validation.SE Queensland.Bremar.Bremar.Field.SurfaceOrganicMatter
            Operations IrrigationSchedule
            Report: EventNames=[Clock].DoReport
              VariableNames:
                [Clock].Today
                [Soil].SoilWater.SW
                [Soil].SoilWater.Eo
                [Soil].SoilWater.Es
                [Soil].SoilWater.Drainage
                [Soil].SoilWater.Runoff
                [Soil].SoilWater.pond
                sum([Soil].SoilWater.SWmm) as ProfileWater
                [Soil].NO3N
                [MicroClimate].net_radn
                [MicroClimate].peta
                [MicroClimate].petr
                [Chickpea].AboveGround.Wt
                [Chickpea].Leaf.LAI
                [Chickpea].Nodule.NFixed
            Report HarvestReport: EventNames=[Chickpea].Harvesting
              VariableNames:
                [Clock].Today
                [Chickpea].Phenology.CurrentStageName as Stage
                [Chickpea].Phenology.FloweringDAS.Value as FloweringDAS
                [Chickpea].Phenology.MaturityDAS.Value as MaturityDAS
                [Chickpea].Grain.Live.Wt as GrainWt
                [Chickpea].Phenology.FinalNodeNo.Value
                [Chickpea].Phenology.EmergenceDAS.Value as EmergenceDAS
            Manager Harvesting: same as Validation.SE Queensland.Lawes1999.Lawes1999.Field.Harvesting
            Plant Chickpea: CropType=Chickpea
            Manager AutoIrrigate
              FASW = 0
              WaterDeficit = 0
              AutoIrrigationOn = True
              StartStageName = Sowing
              EndStageName = EndGrainFill
              FASWThreshold = 0.9
              FASWDepth = 1000
              script: same as in Validation.SE Queensland.Lawes1990.Lawes1990.Field.AutoIrrigate
            Manager SowingRule
              SowDate = 24-Jul
              CultivarName = Hashem
              SowingDepth = 50
              RowSpacing = 750
              Population = 6
              script: same as in Validation.SE Queensland.Hermitage_92.Hermitage_92.Field.SowingRule
            Soil WI_SCAF005: SoilType=Gleyic Solonchak (SCg); Country=Afganistan; Latitude=34.333; Longitude=61.433
              DataSource=Romero, C.C., Hoogenboom, G., Baigorria, G.A., Koo, J., Gijsman, A.J., Wood, S., 2012. Reanalysis of a global soil database for crop and environmental modeling. Environmental Modelling & Software 35, 163-170.  https://harvestchoice.wufoo.com/forms/download-wisol.
              Comments=You will need to add crops to this soil before running simulations.
              Water
                Thickness  BD    AirDry  LL15   DUL    SAT
                150        1.1   0.05    0.143  0.339  0.548
                200        1.3   0.06    0.165  0.283  0.488
                350        1.33  0.03    0.088  0.215  0.475
                400        1.46  0.05    0.156  0.295  0.425
                600        1.46  0.05    0.156  0.295  0.425
                1000       1.33  0.1     0.307  0.453  0.485
                SoilCrop ChickpeaSoil: LL=[0.14, 0.17, 0.09, 0.16, 0.16, 0.31]; KL=[0.06, 0.06, 0.06, 0.06, 0.06, 0.06]; XF=[1, 1, 1, 0.5, 0, 0]
              SoilWater: residueinterception=0; SummerDate=1-Apr; SummerU=9.2; SummerCona=3; WinterDate=1-Nov; WinterU=9.2; WinterCona=3; DiffusConst=0; DiffusSlope=0; Salb=0.13; CN2Bare=75; CNRed=0; CNCov=0; max_pond=0; Thickness=[150, 200, 350, 400, 600, 1000]; SWCON=[0.5, 0.5, 0.5, 0.5, 0.5, 0.5]
              SoilNitrogen: fom_type=[default, manure, mucuna, lablab, shemp, stable]; fract_carb=[0.2, 0.3, 0.54, 0.57, 0.45, 0]; fract_cell=[0.7, 0.3, 0.37, 0.37, 0.47, 0.1]; fract_lign=[0.1, 0.4, 0.09, 0.06, 0.08, 0.9]; wfpsN2N2O_x=[22, 88]; wfpsN2N2O_y=[0.1, 1]
              SoilOrganicMatter: RootCN=40; RootWt=500; SoilCN=14; EnrACoeff=0; EnrBCoeff=0; OCUnits=Total
                Thickness  OC    FBiom  FInert
                150        1.46  0.04   0.4
                200        0.84  0.02   0.66
                350        0.6   0.01   0.9
                400        0.6   0.01   0.99
                600        0.6   0.01   0.99
                1000       0.6   0.01   0.99
              Analysis: Thickness=[150, 200, 350, 400, 600, 1000]; PH=[8.6, 8.9, 8.7, 8.9, 9.1, 9.1]; PHUnits=Water; BoronUnits=HotWater
              InitialWater Initial Water: PercentMethod=FilledFromTop; FractionFull=1
              Sample Initial nitrogen: NO3Units=ppm; NH4Units=ppm; SWUnits=Volumetric; OCUnits=Total; PHUnits=Water
                Thickness  NO3  NH4
                150        0.1  0.1
                200        0.1  0.1
                350        0.1  0.1
                400        0.1  0.1
                600        0.1  0.1
                1000       0.1  0.1
      Experiment Gorgan04
        Factors
          Factor Treatment: Specifications=[SowingRule]
            Manager S1PD1
              SowDate = 6-dec
              CultivarName = Hashem
              SowingDepth = 50
              RowSpacing = 300
              Population = 15
              script: same as in Validation.SE Queensland.Hermitage_92.Hermitage_92.Field.SowingRule
            Manager S1PD2
              SowDate = 6-dec
              CultivarName = Hashem
              SowingDepth = 50
              RowSpacing = 300
              Population = 30
              script: same as in Validation.SE Queensland.Hermitage_92.Hermitage_92.Field.SowingRule
            Manager S1PD3
              SowDate = 6-dec
              CultivarName = Hashem
              SowingDepth = 50
              RowSpacing = 300
              Population = 45
              script: same as in Validation.SE Queensland.Hermitage_92.Hermitage_92.Field.SowingRule
            Manager S1PD4
              SowDate = 6-dec
              CultivarName = Hashem
              SowingDepth = 50
              RowSpacing = 300
              Population = 60
              script: same as in Validation.SE Queensland.Hermitage_92.Hermitage_92.Field.SowingRule
            Manager S2PD1
              SowDate = 20-jan
              CultivarName = Hashem
              SowingDepth = 50
              RowSpacing = 300
              Population = 15
              script: same as in Validation.SE Queensland.Hermitage_92.Hermitage_92.Field.SowingRule
            Manager S2PD2
              SowDate = 20-jan
              CultivarName = Hashem
              SowingDepth = 50
              RowSpacing = 300
              Population = 30
              script: same as in Validation.SE Queensland.Hermitage_92.Hermitage_92.Field.SowingRule
            Manager S2PD3
              SowDate = 20-jan
              CultivarName = Hashem
              SowingDepth = 50
              RowSpacing = 300
              Population = 45
              script: same as in Validation.SE Queensland.Hermitage_92.Hermitage_92.Field.SowingRule
            Manager S2PD4
              SowDate = 20-jan
              CultivarName = Hashem
              SowingDepth = 50
              RowSpacing = 300
              Population = 60
              script: same as in Validation.SE Queensland.Hermitage_92.Hermitage_92.Field.SowingRule
            Manager S3PD1
              SowDate = 21-mar
              CultivarName = Hashem
              SowingDepth = 50
              RowSpacing = 300
              Population = 15
              script: same as in Validation.SE Queensland.Hermitage_92.Hermitage_92.Field.SowingRule
            Manager S3PD2
              SowDate = 21-mar
              CultivarName = Hashem
              SowingDepth = 50
              RowSpacing = 300
              Population = 30
              script: same as in Validation.SE Queensland.Hermitage_92.Hermitage_92.Field.SowingRule
            Manager S3PD3
              SowDate = 21-mar
              CultivarName = Hashem
              SowingDepth = 50
              RowSpacing = 300
              Population = 45
              script: same as in Validation.SE Queensland.Hermitage_92.Hermitage_92.Field.SowingRule
            Manager S3PD4
              SowDate = 21-mar
              CultivarName = Hashem
              SowingDepth = 50
              RowSpacing = 300
              Population = 60
              script: same as in Validation.SE Queensland.Hermitage_92.Hermitage_92.Field.SowingRule
        Simulation Soltani_3: Area=0; Slope=0
          Memo: same as Validation.SE Queensland.Hermitage_92.Hermitage_92.memo
          Weather: FileName=Gorgan.met
          Clock: StartDate=2003-12-01; EndDate=2005-03-30
          Summary summaryfile
          SoilArbitrator Soil Arbitrator
          Zone Field: Area=1; Slope=0
            MicroClimate: same as Validation.SE Queensland.Lawes1990.Lawes1990.Field.MicroClimate
            Irrigation
            Fertiliser
            SurfaceOrganicMatter: same as Validation.SE Queensland.Bremar.Bremar.Field.SurfaceOrganicMatter
            Operations IrrigationSchedule
            Report: same as Validation.SE Queensland.Hermitage_92.Hermitage_92.Field.Report
            Report HarvestReport: same as Validation.Iran.Gorgan03.Soltani_2.Field.HarvestReport
            Manager Harvesting: same as Validation.SE Queensland.Lawes1999.Lawes1999.Field.Harvesting
            Plant Chickpea: CropType=Chickpea
            Manager AutoIrrigate: same as Validation.Iran.Gorgan03.Soltani_2.Field.AutoIrrigate
            Manager SowingRule: same as Validation.Iran.Gorgan03.Soltani_2.Field.SowingRule
            Soil WI_SCAF005: same as Validation.Iran.Gorgan03.Soltani_2.Field.WI_SCAF005
      Experiment Gorgan01029096c
        Factors
          Factor S: Specifications=[SowingRule]
            Operations 1
              2001-12-12  [Chickpea].Sow(population:50, cultivar:"Hashem", depth:50, rowSpacing:250);
            Operations 2
              2002-01-15  [Chickpea].Sow(population:50, cultivar:"Hashem", depth:50, rowSpacing:250);
            Operations 3
              2002-02-15  [Chickpea].Sow(population:50, cultivar:"Hashem", depth:50, rowSpacing:250);
            Operations 4
              2002-03-17  [Chickpea].Sow(population:50, cultivar:"Hashem", depth:50, rowSpacing:250);
            Operations 5
              2002-04-16  [Chickpea].Sow(population:50, cultivar:"Hashem", depth:50, rowSpacing:250);
            Operations 6
              2002-05-18  [Chickpea].Sow(population:50, cultivar:"Hashem", depth:50, rowSpacing:250);
            Operations 7
              2002-09-15  [Chickpea].Sow(population:50, cultivar:"Hashem", depth:50, rowSpacing:250);
            Operations 8
              2002-10-14  [Chickpea].Sow(population:50, cultivar:"Hashem", depth:50, rowSpacing:250);
            Operations 9
              2002-11-12  [Chickpea].Sow(population:50, cultivar:"Hashem", depth:50, rowSpacing:250);
        Simulation Soltani_1_9096c: Area=0; Slope=0
          Weather: FileName=Gorgan.met
          Clock: StartDate=2001-01-01; EndDate=2002-12-31
          Summary summaryfile
          SoilArbitrator Soil Arbitrator
          Zone Field: Area=1; Slope=0
            MicroClimate: same as Validation.SE Queensland.Lawes1990.Lawes1990.Field.MicroClimate
            Fertiliser
            SurfaceOrganicMatter: same as Validation.SE Queensland.Lawes1999.Lawes1999.Field.SurfaceOrganicMatter
            Operations SowingRule
              1992-05-07  [Chickpea].Sow(population:40, cultivar:"Hashem", depth:50, rowSpacing:150);
            Report: same as Validation.SE Queensland.Hermitage_92.Hermitage_92.Field.Report
            Report HarvestReport: same as Validation.Iran.Gorgan03.Soltani_2.Field.HarvestReport
            Manager Harvesting: same as Validation.SE Queensland.Lawes1999.Lawes1999.Field.Harvesting
            Plant Chickpea: CropType=Chickpea
            Soil WI_SCAF005: same as Validation.Iran.Gorgan03.Soltani_2.Field.WI_SCAF005
            Manager AutoIrrigate: same as Validation.Iran.Gorgan03.Soltani_2.Field.AutoIrrigate
            Irrigation
      Experiment Gorgan0102Hashem
        Factors: same as Validation.Iran.Gorgan01029096c.Factors
        Simulation Soltani_1_hashem: Area=0; Slope=0
          Weather: FileName=Gorgan.met
          Clock: StartDate=2001-01-01; EndDate=2002-12-31
          Summary summaryfile
          SoilArbitrator Soil Arbitrator
          Zone Field: Area=1; Slope=0
            MicroClimate: same as Validation.SE Queensland.Lawes1990.Lawes1990.Field.MicroClimate
            Fertiliser
            SurfaceOrganicMatter: same as Validation.SE Queensland.Lawes1999.Lawes1999.Field.SurfaceOrganicMatter
            Operations SowingRule
              1992-05-07  [Chickpea].Sow(population:40, cultivar:"Hashem", depth:50, rowSpacing:150);
            Report: same as Validation.SE Queensland.Hermitage_92.Hermitage_92.Field.Report
            Report HarvestReport: same as Validation.Iran.Gorgan03.Soltani_2.Field.HarvestReport
            Manager Harvesting: same as Validation.SE Queensland.Lawes1999.Lawes1999.Field.Harvesting
            Plant Chickpea: CropType=Chickpea
            Soil WI_SCAF005: SoilType=Gleyic Solonchak (SCg); Country=Afganistan; Latitude=34.333; Longitude=61.433
              DataSource=Romero, C.C., Hoogenboom, G., Baigorria, G.A., Koo, J., Gijsman, A.J., Wood, S., 2012. Reanalysis of a global soil database for crop and environmental modeling. Environmental Modelling & Software 35, 163-170.  https://harvestchoice.wufoo.com/forms/download-wisol.
              Comments=You will need to add crops to this soil before running simulations.
              Water
                Thickness  BD    AirDry  LL15   DUL    SAT
                150        1.1   0.05    0.143  0.339  0.548
                200        1.3   0.06    0.165  0.283  0.488
                350        1.33  0.03    0.088  0.215  0.475
                400        1.46  0.05    0.156  0.295  0.425
                600        1.46  0.05    0.156  0.295  0.425
                1000       1.33  0.1     0.307  0.453  0.485
                SoilCrop ChickpeaSoil: LL=[0.2, 0.2, 0.2, 0.25, 0.34, 0.34]; KL=[0.06, 0.06, 0.06, 0.06, 0.06, 0.06]; XF=[1, 1, 1, 0.5, 0, 0]
              SoilWater: same as Validation.Iran.Gorgan03.Soltani_2.Field.WI_SCAF005.SoilWater
              SoilNitrogen: fom_type=[default, manure, mucuna, lablab, shemp, stable]; fract_carb=[0.2, 0.3, 0.54, 0.57, 0.45, 0]; fract_cell=[0.7, 0.3, 0.37, 0.37, 0.47, 0.1]; fract_lign=[0.1, 0.4, 0.09, 0.06, 0.08, 0.9]; wfpsN2N2O_x=[22, 88]; wfpsN2N2O_y=[0.1, 1]
              SoilOrganicMatter: same as Validation.Iran.Gorgan03.Soltani_2.Field.WI_SCAF005.SoilOrganicMatter
              Analysis: Thickness=[150, 200, 350, 400, 600, 1000]; PH=[8.6, 8.9, 8.7, 8.9, 9.1, 9.1]; PHUnits=Water; BoronUnits=HotWater
              InitialWater Initial Water: PercentMethod=FilledFromTop; FractionFull=1
              Sample Initial nitrogen: NO3Units=ppm; NH4Units=ppm; SWUnits=Volumetric; OCUnits=Total; PHUnits=Water
                Thickness  NO3  NH4
                150        0.1  0.1
                200        0.1  0.1
                350        0.1  0.1
                400        0.1  0.1
                600        0.1  0.1
                1000       0.1  0.1
            Manager AutoIrrigate: same as Validation.Iran.Gorgan03.Soltani_2.Field.AutoIrrigate
            Irrigation
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