Simulations: Version=7
  Memo TitlePage
    # The APSIM Chicory Model

    _Rogerio Cichota, AgResearch, New Zealand_

    ##Preamble
    Chicory (*Cichorium intybus* L.) is a perennial herb of the family Asteraceae native of Europe and Asia, but which can now be found in meadows worldwide ([Garnock-Jones_1987]; [HareEtAl_1990]; [AlloushEtAl_2003]; [LiKemp_2005]).  Two main varieties have been selected for agricultural uses, leaf chicory (var. *foliosum*), which has been cultivated for salads as well as a forage for livestock, and root chicory (var. *sativum*), grown for the taproots, which are used as a coffee substitute and more recently as dietary supplement ([DielenEtAl_2005]; [ErnstEtAl_1995]; [JurgonskiEtAl_2011]).  Wild varieties are considered a weed in many countries.
    The chicory plant has large shiny hairless leaves that grow from a basal rosette ([HareEtAl_1990]; [ErnstEtAl_1995]; [ReaumePanflet2010]), it has a thick deep taproot which holds carbohydrate reserves that allow prompt re-growth after winter or defoliation.  When vernalised, chicory will produce stems which contain several bright blue flowers, the stems become woody when flower buds start to appear.  Leaves do grow on stems but are quite small and decrease in size from the base to apex.  Flower buds form sequentially in the axils of the upper leaves of the main stem and branches.  Seeds reach maturity rapidly so the same plant will have young flowers and ripe seeds at the same time ([HareEtAl_1990]; [MoloneyMilne_1993]; [ClaphamEtAl_2001]; [ReaumePanflet2010]).
    Forage chicory is considered a moderately persistent herb under grazing conditions, its initial rosette can split into multiple crowns after the first growing season ([MoloneyMilne_1993]; [LiEtAl_1997c]; [ClaphamEtAl_2001]; [LiKemp_2005]).  Rapid establishment during spring/summer months provides a great competitive advantage for forage chicory over weeds, and it can be used as a monoculture or in mixed swards.  Chicory has shown resilience and potential to produce high yields at a wide range of management strategies ([ClarkEtAl_1990a]; [JungEtAl_1996]; [LiEtAl_1997b]; [LabreveuxEtAl_2004]), and is highly palatable to ruminants ([ClarkEtAl_1990b]; [JungEtAl_1996]).  The palatability of forage chicory will lead to preferential grazing and result in a competitive disadvantage for chicory in mixed swards, compromising its persistence.  Although it is classified as a perennial plant, the population in a chicory sward will decrease over time due to a variety of reasons, such as disease, selective grazing, and physical damage by trampling.

    **Objective:**  The model presented here has been built using the Plant Modelling Framework (PMF) of [brown_plant_2014] to simulate the growth of a forage chicory crop.  Currently, the focus is mainly on describing biomass accumulation and regrowth after harvest on monocultural swards.  As part of APSIM's PMF, using chicory for multicropping is possible, but this has not been fully tested.  Likewise, describing the effect of population decrease on plant growth was not attempted; for swards free of weeds and within typical population ranges, the changes in plant size (number of crowns) and LAI should compensate for loss of population (e.g. [LiEtAl_1997b]), but competition with weeds would alter this pattern significantly.
    Simulating variations in plant N concentration (seasonal or due to changes in soil status)  is not a focus of the current model.  Further development of PMF's supply/demand processes are needed for capturing the variations in N content typically seen in perennial species.

    ## Generic background
  Replacements
    Plant Chicory: CropType=Chicory
      Memo GeneralDescription
        ## Presentation

        This model has been developed to simulate the growth of a forage chicory crop.  The chicory model focus, thus, on describing primarily the vegetative growth, with a simplified account of the reproductive phase, without explicit considering flowers and seeds (these may be included in future releases).  The model was built using the Plant Modelling Framework (PMF) described by [brown_plant_2014].  To simulate the aboveground plant structure, including the photosynthesis process, the Chicory model uses the SimpleLeaf organ type of PMF.  The model describes a semi-perennial crop, with phenology rewinding to the vegetative stage at the end of the reproductive phase.

        ## Inclusion in APSIM simulations
        A forage chicory crop can be included in a simulation the same as any other APSIM crop.

         * - The chicory object can be dragged or copied from the Crop folder in the tool box into a Field in your simulation;
         * - To become active, chicory needs to be sown using a manager script with a sowing rule. e.g.:
        <pre><code class='language-cs'>
         Chicory.Sow(cultivar: Puna, population: 200, depth: 10, rowSpacing: 150);
        </code></pre>
        If a specified cultivar is not available, a fatal error will be thrown.

        ###Harvest and biomass removal
        Chicory biomass can be removed by raising one of the valid methods: Harvest, Cut, Graze, or Prune; this is done using a manager script, like for other crops.  The proportion of the biomass of each organ that is removed from the system and/or added to the residue pools may be specified; otherwise defaults will be used.  Note that the sum of fractions removed and added to residue should be <= 1.0.  To specify the proportions for removal in a manager script, use a RemovalFractions class as shown below:
        <pre><code class='language-cs'>
        [EventSubscribe("Commencing")]
        private void OnSimulationCommencing(object sender, EventArgs e)
        {
          RemoveFraction = new RemovalFractions(Chicory.Organs);
        }
        [EventSubscribe("DoManagement")]
        private void OnDoManagement(object sender, EventArgs e)
        {
          if (Clock.Today.Date == HarvestDate)
          {
            RemoveFraction.SetFractionToRemove("Leaf", 0.80);
            RemoveFraction.SetFractionToRemove("Stem", 0.50);
            RemoveFraction.SetFractionToResidue("leaf",0.05);
            Chicory.Harvest(RemoveFraction);
          }
        }
         </code></pre>
        The RemovalFractions class can be sent with Harvest, Cut, Graze, or Prune events. All parameters are optional, defaults are used whenever any value is not specified.

        ###Crop termination
        To fully terminate a crop the EndCrop event should be raised:
        <pre><code class='language-cs'>
         Chicory.EndCrop();
        </code></pre>
        Once a crop has been ended the field is open to be used by another APSIM plant model, or another chicory crop.  Note that ending chicory is not necessary before sowing another crop, competition for resources will take place between crops when there is more than one in the field.

        ## Acknowledgements
        This model was developed with help from Russel McAuliffe and Brittany Paton organising data and simulations. Datasets were kindly shared by Julia M. Lee, Hamish E. Brown, and the Forages for Reduced Nitrogen Leaching (FRNL) programme.
      Phenology: DaysAfterSowing=0
        Memo Description
          The duration of each phenologic phase in Chicory is controlled in general by the accumulation of thermal time; for the reproductive phase, vernalisation and photoperiod are also used.
        AirTemperatureFunction ThermalTime
          Memo Description
            The thermal time is calculated from the daily average temperature using three cardinal temperatures: minimum, maximum, and optimum.  Crop development acelerates as temperature increases from minimum to optimum and slows down after that, stopping completely when maximum temperature is reached.  For chicory, the minimum temperature seems to be around 3-5oC ([AmaducciEtAl_1998]; [MootEtAl_2000]; [ClaphamEtAl_2001]), although growth and emergence have been reported to be greatly reduced for temperatures below 10-14oC ([JungEtAl_1996]; [Schittenhelm_2001]).  Optimum temperature is reported to be around 20-25oC ([MootEtAl_2000]; [Schittenhelm_2001]; [MathieuEtAl_2014]) whereas the maximum temperature should be close to 35oC ([MathieuEtAl_2014]; [LangworthyEtAl_2015]).
          XYPairs: X=[5, 25, 35]; Y=[0, 25, 0]
        PhotoperiodFunction Photoperiod: Twilight=-6; DayLength=0
        VernalisationC Vernalisation: StartStage=Emergence; EndStage=Bolting; ResetStage=Ripening
          Memo Description
            Vernalisation is the process whereby the plant acquires the ability to go into reproductive phase after been exposed to a period of time at low temperatures ([Wiebe_1990]; [DemeulemeesterEtAl_1998]). For chicory the temperature range for vernalisation is between 0 and 12oC, with optimum about 4-6oC ([Wiebe_1989]; [Wiebe_1990]; [Gianquinto_1997]; [DielenEtAl_2005]).
            The reversal of vernalisation, or de-vernalisation, can happen on chicory ([Wiebe_1990]; [Gianquinto_1997]), if plants are exposed to sufficiently high temperatures soon after the period under vernalisation the effects of vernalisation are cancelled out. Most plants show small reversal at relatively lower temperatures (above something in between 15 and 20oC), and larger at temperatures above 30oC. For chicory, the more effective temperature to reverse vernalisation seem to be around 30-35oC ([Gianquinto_1997]; [GoodgerThesis_2013]). Intermediate temperatures stabilise the vernalisation, and after 5-10 days reversal is no longer possible.
            The number of days required for full vernalisation is quite variable in chicory and specific to each cultivar, with 30-50 days often given for full vernalisation ([Wiebe_1990]; [Gianquinto_1997]; [DielenEtAl_2005]). However, some plants of leafy cultivars can go into reproductive phase if exposed to cold conditions for about a week or less ([Gianquinto_1997]). For forage chicory (cv. Puna) at field conditions in the USA, about 50-60% of the plants reached reproductive stage after winter ([ClaphamEtAl_2001]; [SandersonEtAl_2003]), and plants that bolted on one year tended to remain vegetative the following year and vice-versa. In New Zealand conditions, reproductive phase seems to occur every year after winter ([HareEtAl_1990]), although the extent of it has not been reported. The data published suggest a minimum number of days for vernalisation (approximately 10 days) and a progressive increase in the number of plants vernalised as the number of days the plants are kept under cold conditions increases. This is simulated by the model by assuming that the change in biomass fixation during stem elongation and reproductive phases (prioritising stems and flowers) is a function of vernalisation.
          AirTemperatureFunction VernalisingDays
            XYPairs: X=[0, 4, 6, 12]; Y=[0, 1, 1, 0]
          AirTemperatureFunction DevernalisingDays
            XYPairs: X=[0, 15, 30, 40]; Y=[0, 0, 1, 1]
          Constant DaysToStabilise: FixedValue=10; Units=days
        GerminatingPhase Germinating: Start=Sowing; End=Germination
          Memo Description
            Germination will occur one day after sowing, provided that soil extractable water is greater than zero.  Germination rates for chicory typically vary between 70 and 95% when sown close to the surface (<10mm), with plenty of moisture and at good temperature ([MootEtAl_2000]; [SandersonElwinger_2000b]; [ReedEtAl_2008]; [LeeEtAlYields_2015]).  The chicory model assumes 100% germination, and therefore the user must correct sowing rate if variation between actual sowing rate and germination is considered important.
        EmergingPhase Emerging: Start=Germination; End=Emergence; ShootLag=75; ShootRate=10
          Memo Description
             Chicory has small seeds and emergence has been shown to be strongly affected by sowing depth ([PeriEtAl_2000]; [SandersonElwinger_2000a]), with best performace for seeds at <10mm and practically no emergence from a depth of 60 mm (for forage cultivars).  This effect is not explicitly simulated by the chicory model in the current version.
          VariableReference ThermalTime: VariableName=[Phenology].ThermalTime.Value()
        GenericPhase Vegetative: Start=Emergence; End=Vernalised
          Memo Description
            During this phase the plant only partitions biomass to leaf and root+taproot organs.  The phase start initially after emergence, but it is also re-called after the end of the reproductive phase (phenology reset).  It ends when a minimum level of vernalisation has been reached.
            Most leaf chicory cultivars (e.g. Radicchio) seem to have a facultative or quantitative response to vernalisation, that is, flowering can occurs without it if other conditions are right, but flowering will be hastened and enhanced by vernalisation ([Gianquinto_1997]; [DielenEtAl_2005]).  Root cultivars have an absolute need for vernalisation and also seem to require a certain age to be able to be vernalised, whereas leaf cultivars can be vernalised at any age ([Gianquinto_1997]; [Schittenhelm_2001]).  Forage chicory seem to be in between these two extremes, with reports that at least some vernalisation is required ([HareEtAl_1990]; [MoloneyMilne_1993]).
            The chicory model considers that a minimum vernalisation is needed, but this is quite small (mostly based on data from [Gianquinto_1997]). Vernalisation will have a greater effect on the extent of stem and flowers growth ([Wiebe_1989]; [Gianquinto_1997]; [DielenEtAl_2005]), and thus vernalisation accumulation is considered throughout the inductive phase.
          Constant Target: FixedValue=10; Units=<sup>o</sup>Cd
          VariableReference ThermalTime: VariableName=[Phenology].Vernalisation.TodaysVernalisation
        GenericPhase Inductive: Start=Vernalised; End=Bolting
          Memo Description
            This phase represents the period when the plant awaits for the cue to start of the reproductive growth, for chicory this is given by photoperiod ([Wiebe_1990]; [MoloneyMilne_1993]). For forage chicory the end of this phase seem to occur when the daylight is around 12-14 hours ([HareEtAl_1990]; [MoloneyMilne_1993]; [Gianquinto_1997]; [ClaphamEtAl_2001]). During this phase the plant still only allocates biomass to leaf and root+taproot organs. Vernalisation continues to accumulate throught this phase and will have an effect on the extent that biomass partition changes during reproductive growth ([Wiebe_1989]; [Gianquinto_1997]; [SandersonEtAl_2003]; [DielenEtAl_2005]).
          Constant Target: FixedValue=30; Units=<sup>o</sup>Cd
          LinearInterpolationFunction ThermalTime: XProperty=[Phenology].Photoperiod.Value()
            XYPairs: X=[10, 11.5, 14, 15]; Y=[0, 0, 1, 1]
        GenericPhase StemElongation: Start=Bolting; End=Flowering
          Memo Description
            During this phase the chicory plant switches biomass partitioning, strongly prioritising stem organs, although leaf and root+taproot can still grow.  Stem growth intensity decreases when flower buds start to appear ([HareEtAl_1990]; [ClaphamEtAl_2001]).  In the USA, stem growth of forage chicory has been observed to occur for a period of time equivalent to the accumulation of thermal time of about 800-1000 oCd after bolting ([ClaphamEtAl_2001]).  These values agreed well with the qualitative description of chicory development in New Zealand  ([HareEtAl_1990]).
          Constant Target: FixedValue=800; Units=<sup>o</sup>Cd
          VariableReference ThermalTime: VariableName=[Phenology].ThermalTime.Value()
        GenericPhase Reproductive: Start=Flowering; End=Ripening
          Memo Description
            During this phase the plant is partitioning biomass to all organs, but prioritising reproductive organs (flowers and seed). In the current model, seeds are not explicitly described and only a generic organ refered to as inflorescence is defined.  This was done partly due to lack of data and partly because of the complex physiology of chicory. There is a great level of variability among chicory plants on when and for how long flowering occurs, plus even the same plant can have flowers, young seeds, as well as ripen seeds at the same time ([HareEtAl_1990]; [MoloneyMilne_1993]; [ClaphamEtAl_2001]).
            Data from the USA and New Zealand suggest that the reproductive phase lasts for the equivalent of the accumualtion of thermal time of about 800-1000oCd ([HareEtAl_1990]; [ClaphamEtAl_2001]).
          Constant Target: FixedValue=800; Units=<sup>o</sup>Cd
          VariableReference ThermalTime: VariableName=[Phenology].ThermalTime.Value()
        GotoPhase: Start=Ripening; End=Ripening; FractionComplete=0; PhaseNameToGoto=Vegetative
          Memo Description
            For chicory, the phase used to reset phenology is 'Vegetative'.
      OrganArbitrator Arbitrator
        RelativeAllocation NArbitrator
          Memo Description
            Controls the allocation of N to each of the plant's organs.  Partition is based on:
        RelativeAllocation DMArbitrator
          Memo Description
            Controls the allocation of biomass to each of the plant's organs. Partition is based on:
      SimpleLeaf Leaf: CohortsInitialised=false; Albedo=0.18; Gsmax=0.015; R50=150; MicroClimatePresent=true
        zero: TipsAtEmergence, CohortsAtInitialisation, InitialisedCohortNo, AppearedCohortNo, PlantAppearedLeafNo, LAI, Height, FRGR, PotentialEP, KDead, LAIDead
        Memo Description
          __Note:__ Represents all leaves in the plant.  There is no distiction between age or place in the canopy.
        MultiplyFunction InitialWtFunction
          Memo Description
            It is assumed that 1/3 of the seed biomass is apportioned to shoot upon emergence.  Seed weight for chicory varies between 1.4 and 1.7 g/1000 seeds ([HareEtAl_1990]; [ReedEtAl_2008]).
          Constant InitialPlantWt: FixedValue=0.005; Units=g/plant
          VariableReference Population: VariableName=[Plant].Population
        Constant StructuralFraction: FixedValue=0.95; Units=g/g
          Memo Description
            This is the default value for PMF.
        Constant MinimumNConc: FixedValue=0.02; Units=gN/gDM
          Memo Description
            This is the lowest N concentration that leaves can have and it is the minimum for growth.  It represents the N content for structural tissues and is the concentration of dead material.  Published values suggest that the lowest concentration for leaves is around 1.0-2.0% ([ClarkEtAl_1990a]; [ClarkEtAl_1990b]; unpublished FRNL data).
        Constant MaximumNConc: FixedValue=0.055; Units=gN/gDM
          Memo Description
            This represents the maximum limit for N concentration in leaves.  Some of this N is not essential for growth, but can affect photosynthesis.  Literature data, plus that from the FRNL programme (used in the validation tests) suggest that values for maximum N concentration are about 5.0-6.0% ([ZagalEtAl_2001]; [NeelEtAl_2002]; [AlloushEtAl_2003]; [LeeEtAlYields_2015]).
        Constant CriticalNConc: FixedValue=0.04; Units=gN/gDM
          Memo Description
            This is the N concentration below which growth is limited.  Uptake can increase N content above this level, up to that defined by the maximum N concentration.  This parameter is difficult to define without specific experimental data, which is not currently available, and thus might have to be updated in the future.  Based on general plant physiology and considering the values published in several studies ([McCoyEtAl_1997]; [ClarkEtAl_1990b]; [NeelEtAl_2002]; [AlloushEtAl_2003]; [BeleskyEtAl_2004]; [LeeEtAlYields_2015]) the critical N concentration seem to be around 3.5-4.5%.
        RUEModel Photosynthesis
          Memo Description
            Data for photosynthesis or radiation use efficiency (RUE) for chicory are not common and most data from Europe are for root cultivars.  Reported maximum photosynthetic rates vary between 7 and 15 μmol(CO2)/m2.s ([LabreveuxThesis_2002]; [DevachtEtAl_2009]). Estimates for RUE go from 1.9 up to 2.3, for the whole plant  ([MontiEtAl_2005]; [DevachtEtAl_2009]).  Data is also sparse for the effect  of enviromental factors on photosynthesis, so the chicory model uses generic function for the effects of temperature, moisture, and N supply, but these are ajusted based on data published ([LabreveuxThesis_2002]; [MontiEtAl_2005]; [DevachtEtAl_2009]; [KovarEtAl_2012]; [MathieuEtAl_2014]).
          Constant RUE: FixedValue=2; Units=g/MJ
          RUECO2Function FCO2: PhotosyntheticPathway=C3
          LinearInterpolationFunction FN: XProperty=[Leaf].Fn
            XYPairs: X=[0, 0.4, 0.8, 1.5]; Y=[0, 0.5, 1, 1]
          WeightedTemperatureFunction FT: MaximumTemperatureWeighting=0.75
            XYPairs: X=[5, 11, 16, 21, 26, 35]; Y=[0, 0.1, 0.35, 1, 1, 0]
          LinearInterpolationFunction FW: XProperty=[Leaf].Fw
            XYPairs: X=[0, 0.9, 1, 1.5]; Y=[0, 0.95, 1, 1]
          Constant FVPD: FixedValue=1
          VariableReference RadnInt: VariableName=[Leaf].RadIntTot
        DivideFunction FRGRFunction
          Memo Description
            This parameter represents the Fractional Growth Rate, which  is required by the MicroClimate model.  That model uses FRGR to calculate the effect of growth rate on transpiration.
          VariableReference Photosynthesis: VariableName=[Leaf].Photosynthesis.Value()
          MultiplyFunction PotentialPhotosynthesis
            VariableReference PotentialRUE: VariableName=[Leaf].Photosynthesis.RUE.Value()
            MaximumFunction Radiation
              VariableReference RadnInt: VariableName=[Leaf].RadIntTot
              Constant MinRadn: FixedValue=1E-05
        PartitionFractionDemandFunction DMDemandFunction
          Memo Description
            DM demand function attempts to keep the shoot to root ratio (defined by the [TargetShootRootRatio].Value) and then the leaf to stem ratio (set by [TargetStemsLeafRatio].Value) close to a target value, which varies according to the development phase.  This is necessary to ensure that the chicory plants will recover after grazing, that is partitoning a considerable amount of biomass to growing leaves even during reproductive phase.
          PhaseLookup PartitionFraction
            PhaseLookupValue VegetativeAndInductive: Start=Emergence; End=Bolting
              DivideFunction LeafFraction
                MultiplyFunction Numerator
                  VariableReference TargetSR1: VariableName=[TargetShootRootRatio].Value()
                  VariableReference TargetSR2: VariableName=[TargetShootRootRatio].Value()
                AddFunction Denominator
                  MultiplyFunction TargetSRs
                    VariableReference TargetSR1: VariableName=[TargetShootRootRatio].Value()
                    VariableReference TargetSR2: VariableName=[TargetShootRootRatio].Value()
                  VariableReference CurrentSR: VariableName=[ShootRootRatio].Value()
            PhaseLookupValue StemElongationAndReproductive: Start=Bolting; End=Ripening
              DivideFunction LeafFraction
                MultiplyFunction Numerator
                  VariableReference TargetSR1: VariableName=[TargetShootRootRatio].Value()
                  VariableReference TargetSR2: VariableName=[TargetShootRootRatio].Value()
                  VariableReference CurrentSL: VariableName=[StemsLeafRatio].Value()
                MultiplyFunction Denominator
                  AddFunction SRs: same as Replacements.Chicory.Leaf.DMDemandFunction.PartitionFraction.VegetativeAndInductive.LeafFraction.Denominator
                  AddFunction SLs
                    MultiplyFunction TargetSLs
                      VariableReference TargetSL1: VariableName=[TargetStemsLeafRatio].Value()
                      VariableReference TargetSL2: VariableName=[TargetStemsLeafRatio].Value()
                    VariableReference CurrentSL: VariableName=[StemsLeafRatio].Value()
        Constant DMConversionEfficiency: FixedValue=1; Units=0-1
          Memo Description
            This is the default value for PMF.
        Constant MaintenanceRespirationFunction: FixedValue=0; Units=0-1
          Memo Description
            This is the default value for PMF.
        MultiplyFunction LAIFunction
          Memo Description
            The leaf area index (LAI) for green leaves is defined based on the specific leaf area (SLA).  Currently the value for SLA is assumed to be constant in the chicory model, but data for other plants indicates that age and some environmental factors can affect this value.  Although some data for chicory does suggest that SLA varies with light intensity, temperature, soil ioninc strength and moisture ([AlloushEtAl_2003]; DevachtEtAl_2009]; [LabreveuxThesis_2002]; [MathieuEtAl_2014]), there is not enough values to draw function for these relationships, this should be updated in the future when more data is made available.  Based on the available data ([LiEtAl_1997a]; [SandersonElwinger_2000a]; [LabreveuxThesis_2002]; [AlloushEtAl_2003]; [DevachtEtAl_2009]; [KovarEtAl_2012]; [MathieuEtAl_2014]; [LeeEtAlYields_2015]), forage chicory should have SLA from 0.015 to 0.045 m2/g.
          Constant SpecificLeafArea: FixedValue=0.03; Units=m^2/g
          VariableReference LiveLeafWeight: VariableName=[Leaf].Live.Wt
        MultiplyFunction LaiDeadFunction
          Memo Description
            No specific data for LAI or SLA were found for chicory, The value of SLA is thus assumed to be the same as that of live leaves (this is consistent for the model as no biomass reallocation occurs during senescence.
          VariableReference SpecificLeafArea: VariableName=[Leaf].LAIFunction.SpecificLeafArea.Value()
          VariableReference DeadLeafWeight: VariableName=[Leaf].Dead.Wt
        Constant ExtinctionCoefficientFunction: FixedValue=0.6; Units=0-1
          Memo Description
            Only two studies were found with references to light interception or the light extinction coefficient of chicory ([SapkotaEtAl_2012]; [LeeEtAlYields_2015]).  The data from suggest a light extinction coefficient approximately of 0.60-0.65.
        LinearInterpolationFunction HeightFunction: XProperty=[Chicory].AboveGround.Wt
          Memo Description
            The average height of chicory is assumed in the model to be a simple function of above ground biomass. Sward population and competition with other plant should have an influence on this relationship, but more importanly, the presence of stem during reproductive phase should have a major impact on biomass distribtuion in the canopy.  The available data is not enough for developing relationship realiably, so they are not currently accounted for by the model.  Currently this should have only a minor effect as the sensitivity to height of light competition or evapotranspiration calculations is low, but this should be uptaded in the future.
          XYPairs: X=[10, 100, 500]; Y=[100, 400, 1200]
        MultiplyFunction SenescenceRate
          Memo Description
            Availabe data for senescence in chicory is very sparse. Coinsiderable differences were found between plants in vegetative and those with reproductive growth ([ClaphamEtAl_2001]), and drought had less pronounced effect on leaf senesce in chicory than in lucerne or phalaris ([KempEtAl_2002]).  Generic relationships to enviromental factors, such as temperature and soil moisture, are assumed taking that in consideration and based on other plant models.
          Constant ReferenceRate: FixedValue=0.005; Units=/day
          LinearInterpolationFunction StageFactor: XProperty=[Phenology].Stage
            XYPairs: X=[3, 4, 5, 6, 7]; Y=[0.5, 1, 1, 1, 1]
          LinearInterpolationFunction CoverFactor: XProperty=[Leaf].CoverTotal
            XYPairs: X=[0, 0.5, 0.9, 0.95, 0.99, 1]; Y=[1, 1, 1, 1.1, 2, 3]
          WeightedTemperatureFunction TemperatureFactor: MaximumTemperatureWeighting=0.5
            XYPairs: X=[0, 5, 15, 20, 30]; Y=[0, 0, 0.4, 1, 1]
          LinearInterpolationFunction SoilMoistureFactor: XProperty=[Leaf].Fw
            XYPairs: X=[0, 0.5, 1]; Y=[2, 1, 1]
        MultiplyFunction DetachmentRateFunction
          Memo Description
            A generic relationship between detachment and soil moisture is assumed.  It implies that under dry conditions the detachment rate decreases due to the lower level of activity of decomposing microorganisms.
          Constant ReferenceRate: FixedValue=0.1; Units=/day
          LinearInterpolationFunction SoilMoistureFactor: XProperty=[Leaf].Fw
            XYPairs: X=[0, 0.5, 1]; Y=[0.5, 0.5, 0.1]
        Constant DMRetranslocationFactor: FixedValue=0.01; Units=/day
          Memo Description
            This is the default value for PMF.
        Constant DMReallocationFactor: FixedValue=1; Units=/day
          Memo Description
            This is the default value for PMF.
        Constant NRetranslocationFactor: FixedValue=0.05; Units=/day
          Memo Description
            This parameter control the remobilisation of N above the critical N concentration towards new growth, the value used here is a initial guess, but conforms with the data used in the validation.
        Constant NReallocationFactor: FixedValue=1; Units=/day
          Memo Description
            This is the default value for PMF.
        Biomass Live
        Biomass Dead
        BiomassRemoval BiomassRemovalDefaults
          OrganBiomassRemovalType Cut: FractionLiveToRemove=0.7; FractionDeadToRemove=0.5; FractionLiveToResidue=0; FractionDeadToResidue=0
          OrganBiomassRemovalType Graze: FractionLiveToRemove=0.7; FractionDeadToRemove=0.1; FractionLiveToResidue=0.1; FractionDeadToResidue=0.1
          OrganBiomassRemovalType Harvest: FractionLiveToRemove=0; FractionDeadToRemove=0; FractionLiveToResidue=0.1; FractionDeadToResidue=0.1
          OrganBiomassRemovalType Prune: FractionLiveToRemove=0; FractionDeadToRemove=0; FractionLiveToResidue=0.1; FractionDeadToResidue=0.1
      GenericOrgan Stem
        Memo Description
          __Note:__ Represents all the stems and branches in the plant, without any distinction between age or the position in the canopy.
        Constant InitialWtFunction: FixedValue=0; Units=g/m^2
        Constant StructuralFraction: FixedValue=0.95; Units=g/g
          Memo Description
            This is the default value for PMF.
        Constant MinimumNConc: FixedValue=0.007; Units=gN/gDM
          Memo Description
            This is the lowest N concentration for stems and represents the N content for structural tissues, as well as the concentration of dead material.  Published values suggest that the values should be lower than 1.00% ([ClarkEtAl_1990a]; [ClarkEtAl_1990b]; [JungEtAl_1996]), but the actuall value  has not been defined yet.
        LinearInterpolationFunction MaximumNConc: XProperty=[Phenology].Stage
          Memo Description
            This represents the upper limit for N concentration of stems.  Published studies suggest that smal, youger stems and branches have a higher N content as compare to older larger (woody) stem ([ClarkEtAl_1990b]).  As the model does not differntiate stems by age, it was assumed that N concentration in the stems is a function of growth stage, with values varying between 1.2 and 2.2% ([ClarkEtAl_1990a]; [ClarkEtAl_1990b]; [JungEtAl_1996]).
          XYPairs: X=[5, 5.5, 6, 6.5, 7]; Y=[0.0225, 0.0225, 0.016, 0.014, 0.013]
        PartitionFractionDemandFunction DMDemandFunction
          Memo Description
            The allocation of growth biomass to the various organs in the chicory model is done using simple approach.  It is assumed that the proportion of the above ground biomass is allocated to stems based on two target ratios, the [TargetStemsLeafRatio].Value and [FlowerStemRatio].Value).  Allocation of biomass to stems attempts to keep the current ratios close to the targets. Note that stem can only grow during the stem elongation and reproductive phases.
          PhaseLookup PartitionFraction
            PhaseLookupValue StemElongation: Start=Bolting; End=Flowering
              DivideFunction StemFraction
                MultiplyFunction Numerator
                  VariableReference TargetSR1: VariableName=[TargetShootRootRatio].Value()
                  VariableReference TargetSR2: VariableName=[TargetShootRootRatio].Value()
                  VariableReference TargetSL1: VariableName=[TargetStemsLeafRatio].Value()
                  VariableReference TargetSL2: VariableName=[TargetStemsLeafRatio].Value()
                MultiplyFunction Denominator: same as Replacements.Chicory.Leaf.DMDemandFunction.PartitionFraction.StemElongationAndReproductive.LeafFraction.Denominator
            PhaseLookupValue Reproductive: Start=Flowering; End=Ripening
              DivideFunction StemFraction
                MultiplyFunction Numerator
                  VariableReference TargetSR1: VariableName=[TargetShootRootRatio].Value()
                  VariableReference TargetSR2: VariableName=[TargetShootRootRatio].Value()
                  VariableReference TargetSL1: VariableName=[TargetStemsLeafRatio].Value()
                  VariableReference TargetSL2: VariableName=[TargetStemsLeafRatio].Value()
                  VariableReference CurrentFS: VariableName=[FlowerStemRatio].Value()
                MultiplyFunction Denominator
                  AddFunction SRs: same as Replacements.Chicory.Leaf.DMDemandFunction.PartitionFraction.VegetativeAndInductive.LeafFraction.Denominator
                  AddFunction SLs: same as Replacements.Chicory.Leaf.DMDemandFunction.PartitionFraction.StemElongationAndReproductive.LeafFraction.Denominator.SLs
                  AddFunction FSs
                    MultiplyFunction TargetFSs
                      VariableReference TargetFS1: VariableName=[TargetFlowerStemRatio].Value()
                      VariableReference TargetFS2: VariableName=[TargetFlowerStemRatio].Value()
                    VariableReference CurrentFS: VariableName=[FlowerStemRatio].Value()
        Constant DMConversionEfficiency: FixedValue=1; Units=0-1
          Memo Description
            This is the default value for PMF.
        Constant MaintenanceRespirationFunction: FixedValue=0; Units=0-1
          Memo Description
            This is the default value for PMF.
        MultiplyFunction SenescenceRate
          Memo Description
            The reference senescence rate is adjusted using generic relationships with enviromental factors, such as temperature and soil moisture.  These are based on general knowledge from other plant models.
          Constant ReferenceRate: FixedValue=0.1; Units=/day
          LinearInterpolationFunction StageFactor: XProperty=[Phenology].Stage
            XYPairs: X=[3, 4.99, 5, 6, 6.5, 6.75, 7]; Y=[1, 1, 0, 0, 0.1, 0.3, 1]
          WeightedTemperatureFunction TemperatureFactor: MaximumTemperatureWeighting=0.5
            XYPairs: X=[0, 5, 15, 20, 30]; Y=[0, 0, 0.4, 1, 1]
          LinearInterpolationFunction SoilMoistureFactor: XProperty=[Leaf].Fw
            XYPairs: X=[0, 0.5, 1]; Y=[2, 1, 1]
        MultiplyFunction DetachmentRateFunction
          Memo Description
            A generic relationship between detachment and soil moisture is assumed.  It implies that under dry conditions the detachment rate decreases due to the lower level of activity of decomposing microorganisms.
          Constant ReferenceRate: FixedValue=0.1; Units=/day
          LinearInterpolationFunction SoilMoistureFactor: XProperty=[Leaf].Fw
            XYPairs: X=[0, 0.5, 0.75, 1]; Y=[0, 0, 0.25, 1]
        LinearInterpolationFunction DMRetranslocationFactor: XProperty=[Phenology].Stage
          Memo Description
            This represent the potential rate that non-structural biomass of stems can be used as a supply.  It is assumed this is a function of growth stage, as older stems release the reserves towards new growth.
          XYPairs: X=[5, 5.5, 6, 6.5, 7]; Y=[0, 0, 0.005, 0.01, 0.01]
        Constant DMReallocationFactor: FixedValue=1; Units=/day
          Memo Description
            This is the default value for PMF.
        LinearInterpolationFunction NRetranslocationFactor: XProperty=[Phenology].Stage
          Memo Description
            This parameter represents the proportion of N above the minimum content that can can be used for new growth.  It is assumed that this value varies with growth stage as stems become woody and need has lower N concentrations ([ClarkEtAl_1990b]).  The magnitude is guessed based on results shown in the validation tests.
          XYPairs: X=[5, 5.5, 6, 6.5, 7]; Y=[0, 0, 0.01, 0.05, 0.05]
        Constant NReallocationFactor: FixedValue=1; Units=/day
          Memo Description
            This is the default value for PMF.
        Biomass Live
        Biomass Dead
        BiomassRemoval BiomassRemovalDefaults
          OrganBiomassRemovalType Cut: FractionLiveToRemove=0.7; FractionDeadToRemove=0.5; FractionLiveToResidue=0; FractionDeadToResidue=0
          OrganBiomassRemovalType Graze: FractionLiveToRemove=0.5; FractionDeadToRemove=0; FractionLiveToResidue=0.1; FractionDeadToResidue=0.1
          OrganBiomassRemovalType Harvest: FractionLiveToRemove=0; FractionDeadToRemove=0; FractionLiveToResidue=0.1; FractionDeadToResidue=0.1
          OrganBiomassRemovalType Prune: FractionLiveToRemove=0; FractionDeadToRemove=0; FractionLiveToResidue=0.5; FractionDeadToResidue=0.1
      GenericOrgan Inflorescence
        Memo Description
          __Note:__ Represents the reproductive parts of the plant, flowers, pods, seeds, etc.
        Constant InitialWtFunction: FixedValue=0; Units=g/m^2
        Constant StructuralFraction: FixedValue=1; Units=g/g
          Memo Description
            This is the default value for PMF.
        LinearInterpolationFunction MinimumNConc: XProperty=[Phenology].Stage
          Memo Description
            The N concentration in the inflrescence of chicory plants much higher than it is in other organs, about 8.0% ([ClarkEtAl_1990b]). This seem to be related to flowering or seed development, but it is not carried out to seeds, which have a much lower N content, about 2.5-3.0% ([JurgonskiEtAl_2011]; [Wen-Ying_2012]).  Because chicory plants can have flower buds, flower and mature seed at the same time, the N concentration is assumed to vary as a function of stage development, increasing fast at the beggining of the reproductive phase and stabilising after the peak of the season is reached.
          XYPairs: X=[6, 6.25, 6.5, 6.75, 7]; Y=[0.02, 0.03, 0.075, 0.075, 0.07]
        LinearInterpolationFunction MaximumNConc: XProperty=[Phenology].Stage
          Memo Description
            It is assume in the chicory model that the maximum N concentration varies with time in a similar fashion as the minimum N concentration, just at a little higher level.
          XYPairs: X=[6, 6.25, 6.5, 6.75, 7]; Y=[0.03, 0.05, 0.08, 0.08, 0.07]
        PartitionFractionDemandFunction DMDemandFunction
          Memo Description
            The chicory model defines the allocation of biomass to various organs based on simple approach.  The fraction of the above ground biomass allocated to inflorescence is computed by weighting up the current proportion in relation to stems and that of  the target ratio ([FlowerStemRatio].Value).  Note that partiton to inflorescence only occurs during the reproductive phase.
          PhaseLookup PartitionFraction
            PhaseLookupValue Reproductive: Start=Flowering; End=Ripening
              DivideFunction FlowerFraction
                MultiplyFunction Numerator
                  VariableReference TargetSR1: VariableName=[TargetShootRootRatio].Value()
                  VariableReference TargetSR2: VariableName=[TargetShootRootRatio].Value()
                  VariableReference TargetSL1: VariableName=[TargetStemsLeafRatio].Value()
                  VariableReference TargetSL2: VariableName=[TargetStemsLeafRatio].Value()
                  VariableReference TargetFS1: VariableName=[TargetFlowerStemRatio].Value()
                  VariableReference TargetFS2: VariableName=[TargetFlowerStemRatio].Value()
                MultiplyFunction Denominator: same as Replacements.Chicory.Stem.DMDemandFunction.PartitionFraction.Reproductive.StemFraction.Denominator
        Constant DMConversionEfficiency: FixedValue=1; Units=0-1
          Memo Description
            This is the default value for PMF.
        Constant MaintenanceRespirationFunction: FixedValue=0; Units=0-1
          Memo Description
            This is the default value for PMF.
        MultiplyFunction SenescenceRate
          Memo Description
            Generic relationships to enviromental factors, such as temperature and soil moisture, are assumed based on other plant models.
          Constant ReferenceRate: FixedValue=0.25; Units=/day
          LinearInterpolationFunction StageFactor: XProperty=[Phenology].Stage
            XYPairs: X=[3, 5.99, 6, 6.5, 7]; Y=[1, 1, 0, 0.25, 1]
          WeightedTemperatureFunction TemperatureFactor: MaximumTemperatureWeighting=0.5
            XYPairs: X=[0, 5, 15, 20, 30]; Y=[0, 0, 0.4, 1, 1]
          LinearInterpolationFunction SoilMoistureFactor: XProperty=[Leaf].Fw
            XYPairs: X=[0, 0.5, 1]; Y=[2, 1, 1]
        MultiplyFunction DetachmentRateFunction
          Memo Description
            A generic relationship between detachment and soil moisture is assumed.  It implies that under dry conditions the detachment rate decreases due to the lower level of activity of decomposing microorganisms.
          Constant ReferenceRate: FixedValue=0.25; Units=/day
          LinearInterpolationFunction SoilMoistureFactor: XProperty=[Leaf].Fw
            XYPairs: X=[0, 0.5, 1]; Y=[0, 0.5, 1]
        Constant DMRetranslocationFactor: FixedValue=0; Units=/day
          Memo Description
            This is the default value for PMF.
        Constant DMReallocationFactor: FixedValue=0; Units=/day
          Memo Description
            This is the default value for PMF.
        LinearInterpolationFunction NRetranslocationFactor: XProperty=[Phenology].Stage
          Memo Description
            It is assumed that this parameter varies with growth stage, with potential retranslocation higher later in the reproductive season as the proportion of older flowers is higher, and also because flowers have a much larger N concentration that seeds ([ClarkEtAl_1990b]; [JurgonskiEtAl_2011]).
          XYPairs: X=[6, 6.25, 6.5, 6.75, 7]; Y=[0, 0.01, 0.025, 0.05, 0.05]
        Constant NReallocationFactor: FixedValue=1; Units=/day
          Memo Description
            This is the default value for PMF.
        Biomass Live
        Biomass Dead
        BiomassRemoval BiomassRemovalDefaults
          OrganBiomassRemovalType Cut: FractionLiveToRemove=0.8; FractionDeadToRemove=0.1; FractionLiveToResidue=0; FractionDeadToResidue=0
          OrganBiomassRemovalType Graze: FractionLiveToRemove=0.8; FractionDeadToRemove=0.1; FractionLiveToResidue=0.1; FractionDeadToResidue=0.1
          OrganBiomassRemovalType Harvest: FractionLiveToRemove=0.8; FractionDeadToRemove=0.8; FractionLiveToResidue=0.1; FractionDeadToResidue=0.1
          OrganBiomassRemovalType Prune: FractionLiveToRemove=0; FractionDeadToRemove=0; FractionLiveToResidue=0.5; FractionDeadToResidue=0.1
      GenericOrgan Taproot
        Memo Description
          __Note:__ This represents all the taproots of the plant.
          Taproots are quite important for chicory growth, they are the a major reserve organ and can supply N and sugars whenever the plant needs are not fully satified by uptake or photosynthesis.  This can prompt growth especially at the end of winter and following defoliation.  To mimic this process, the chicory model can use the non-structural fraction of taproots' biomass to complement demand for new growth; this is done via biomass retranslocation.  There is a considerable amount of information about the build up of reserves in roots of chicory, although most of it is for root cultivars, some developed specifically for high sugar content in roots ().  Mono- and di-saccharides (fructose and sucrose) and especilly fructans (inulin) reserves build up over the growing season in the taproot and their content can reach 60-80% of dry mater before winter ([AmezianeEtAl_1995]; [ErnstEtAl_1995]; [DemeulemeesterEtAl_1998]; [MontiEtAl_2005]).  This content is much lower for leaf varieties, reaching 20-30% ([LiEtAl_1997a]; [ErnstEtAl_1995];  [QuijadaThesis_2015]), and this can be further reduced if defoliation is severe or the plants have bolted ([Arias-carbajalThesis_1994]; [LiEtAl_1997a]; [Schittenhelm_2001]; [CranstonEtAl_2016]).  Build up of N reserves (as proteins and amino-acids) in taproots has also been show to occur at the end of growing season, and then being used for shoot development after winter ([LimamiEtAl_1996]; [BewleyDerek_2002]).  The controls for the build up of reserves of the rate that they can be used for new growth are still mostly unknown.  Defoliation and environmental stress (drought) have been shown to reduce the reserves ([LiEtAl_1997a], [MontiEtAl_2005]), but it is not clear whether this is a direct affect or due to the greater usage of reserves to cope with the stresses.
          For the chicory model the set of parameters related to the storage of reserves and their utilisation (StructuralFraction, DMRetranslocationFactor, and NRetranslocationFactor) were manipulated in order to reflect the trends shown in the literature review and attempting to reproduce the results of the available experimental datasets (used in the validation tests).  These should be upgraded when data more specific to the retranslocation process is made available.
        Constant InitialWtFunction: FixedValue=0; Units=g/m^2
        Constant StructuralFraction: FixedValue=0.5; Units=g/g
          Memo Description
            The fraction of non-structural biomass in chicory taproots can be quite high, reaching 60-80% of dry mater weight ([AmezianeEtAl_1995]; [ErnstEtAl_1995]; [DemeulemeesterEtAl_1998]; [MontiEtAl_2005]).  However, for forage cultivars, especially under defoliation, the actual content is much smaller, with values around 20-30% being reported ([ErnstEtAl_1995]; [LiEtAl_1997a]; [QuijadaThesis_2015]).  As the chicory model aim to describe forage cultivars primarily, the *potential* fraction of non-structural biomass should be between these two levels.
        Constant MinimumNConc: FixedValue=0.007; Units=gN/gDM
          Memo Description
            The lowest N concentration for taproots is quite difficult to stablish as N can be constantly retranslocated within the plant.  This represents the N content for structural tissues and the lower level for dead material.  Published values suggest that the concentration for taproots under N stress or after winter is around 0.5-1.0% ([AmezianeEtAl_1995]; [ZagalEtAl_2001]; [BewleyDerek_2002]).
        Constant MaximumNConc: FixedValue=0.015; Units=gN/gDM
          Memo Description
            This is the upper limit for N concentration and it is not essential for growth.  The N between the minimum and maximum conentration is considered reserves and is available for retranslocation and reallocation towards new growth.  published data suggest that N concentration in taproots can reach values up to about 1.5-2.0% ([AmezianeEtAl_1995]; [ZagalEtAl_2001]; [BewleyDerek_2002]; [JurgonskiEtAl_2011]).
        PartitionFractionDemandFunction DMDemandFunction
          Memo Description
            Allocation of biomass to taproots in the chicory model is computed assuming that there is a target ratio for the biomass of root and taproot (defined by [TaprootRootRatio].Value).  There is little data in literature that could be used to estimate values for this parameter ([LiEtAl_1997a]; [LabreveuxThesis_2002]; [AlloushEtAl_2003]), and there seem to be large differences between cultivars (those selected for root harvesting have a large proportion of overall biomass allocated to taproots, e.g. [LiEtAl_1997a] or [DevachtEtAl_2009], but no information was found for fine roots). This parameter should be updated when more data becomes available.
          PhaseLookup PartitionFraction
            PhaseLookupValue AllPhases: Start=Emergence; End=Ripening
              DivideFunction TaprootFraction
                MultiplyFunction Numerator
                  VariableReference CurrentSR: VariableName=[ShootRootRatio].Value()
                  VariableReference TargetTR1: VariableName=[TargetTaprootRootRatio].Value()
                  VariableReference TargetTR2: VariableName=[TargetTaprootRootRatio].Value()
                MultiplyFunction Denominator
                  AddFunction SRs: same as Replacements.Chicory.Leaf.DMDemandFunction.PartitionFraction.VegetativeAndInductive.LeafFraction.Denominator
                  AddFunction TRs
                    MultiplyFunction TargetTRs
                      VariableReference TargetTR1: VariableName=[TargetTaprootRootRatio].Value()
                      VariableReference TargetTR2: VariableName=[TargetTaprootRootRatio].Value()
                    VariableReference CurrentTR: VariableName=[TaprootRootRatio].Value()
        Constant DMConversionEfficiency: FixedValue=1; Units=0-1
          Memo Description
            This is the default value for PMF.
        Constant MaintenanceRespirationFunction: FixedValue=0; Units=0-1
          Memo Description
            This is the default value for PMF.
        MultiplyFunction SenescenceRate
          Memo Description
            The reference senescence rate is adjusted using generic relationships with enviromental factors, such as temperature and soil moisture.  These are based on general knowledge from other plant models.
          Constant ReferenceRate: FixedValue=0.001; Units=/day
          WeightedTemperatureFunction TemperatureFactor: MaximumTemperatureWeighting=0.5
            XYPairs: X=[0, 5, 15, 20, 30]; Y=[0, 0, 0.4, 1, 1]
          LinearInterpolationFunction SoilMoistureFactor: XProperty=[Arbitrator].FW
            XYPairs: X=[0, 0.5, 1]; Y=[1, 1, 1]
          Constant SoilAerationFactor: FixedValue=1; Units=0-1
        Constant DetachmentRateFunction: FixedValue=1; Units=/day
          Memo Description
            Folowing convention used for roots in PMF, any taproot senesced is automatically detached and added to the soil fresh organic matter.
        MultiplyFunction DMRetranslocationFactor
          Memo Description
            This parameter controls the rate at which reserves can be used by the plant for new growth.  There is little information on how the plant controls the use of reserves, but it is mostly used after winter when potential growth is high, and after defoliations (e.g. [LimamiEtAl_1996], [LiEtAl_1997c], and [CranstonEtAl_2016]).  For the model, it was assume that the rate of retranslocation was affected by temperature and moisture, which affect growth too.  This ensures that retranslocation is minimal over winter and that reserves are not burn of too quickly in drought conditions (as most plants tend to stop growing is such conditions).  This assumption must be revised when more data is available.
          Constant ReferenceFactor: FixedValue=0.05; Units=/day
          WeightedTemperatureFunction TemperatureFactor: MaximumTemperatureWeighting=0.5
            XYPairs: X=[5, 11, 16, 21, 26, 35]; Y=[0, 0.1, 0.35, 1, 1, 0]
          LinearInterpolationFunction SoilMoistureFactor: XProperty=[Arbitrator].FW
            XYPairs: X=[0, 0.7, 0.85, 1.5]; Y=[0, 0.9, 1, 1]
        Constant DMReallocationFactor: FixedValue=1; Units=/day
          Memo Description
            This is the default value for PMF.
        MultiplyFunction NRetranslocationFactor
          Memo Description
            This is assumed to follow the same trend as biomass retranslocation.
          Constant ReferenceFactor: FixedValue=0.05; Units=/day
          WeightedTemperatureFunction TemperatureFactor: MaximumTemperatureWeighting=0.5
            XYPairs: X=[5, 11, 16, 21, 26, 35]; Y=[0, 0.1, 0.35, 1, 1, 0]
          LinearInterpolationFunction SoilMoistureFactor: XProperty=[Arbitrator].FW
            XYPairs: X=[0, 0.7, 0.85, 1.5]; Y=[0, 0.9, 1, 1]
        Constant NReallocationFactor: FixedValue=1; Units=/day
          Memo Description
            This is the default value for PMF.
        Biomass Live
        Biomass Dead
        BiomassRemoval BiomassRemovalDefaults
          OrganBiomassRemovalType Cut: FractionLiveToRemove=0; FractionDeadToRemove=0; FractionLiveToResidue=0.1; FractionDeadToResidue=0
          OrganBiomassRemovalType Graze: FractionLiveToRemove=0; FractionDeadToRemove=0; FractionLiveToResidue=0.1; FractionDeadToResidue=0
          OrganBiomassRemovalType Harvest: FractionLiveToRemove=0; FractionDeadToRemove=0; FractionLiveToResidue=0.1; FractionDeadToResidue=0
          OrganBiomassRemovalType Prune: FractionLiveToRemove=0; FractionDeadToRemove=0; FractionLiveToResidue=0.1; FractionDeadToResidue=0
      Root: GrowthRespiration=0; MaintenanceRespiration=0
        Memo Description
          __Note:__  this represents all the fine roots of the plant.
          There is no distinction of age, but root biomass is allocated separately for each soil layer with the root zone.   The depth of roothe root zone can change over time as root grows.
          The root organ demands N and DM, and supplies water as well as nitrogen obtained from the soil.
        MultiplyFunction InitialDMNew
          Memo Description
            The model assumes that 2/3 of the seed biomass is converted to root biomass by the time of emergence.  The weight of chicory seeds varies From 1.4 to 1.7 g/1000 seeds ([HareEtAl_1990]; [ReedEtAl_2008]).
          Constant InitialPlantWt: FixedValue=0.01; Units=g/plant
          VariableReference Population: VariableName=[Plant].Population
        Constant InitialDM: FixedValue=0.01; Units=g/plant
        Constant StructuralFraction: FixedValue=1; Units=g/g
          Memo Description
            This is the default value for PMF.
        Constant MinimumNConc: FixedValue=0.014; Units=gN/gDM
          Memo Description
            This lowest N concentration for roots and represents the N content for structural tissues.  Published values suggest that the concentration in roots is much less variable than for taproots and it is on average higher too.  The lower values vary around 1.4% ([BausenweinEtAl_2001]; [ZagalEtAl_2001]; [JurgonskiEtAl_2011]).
        Constant MaximumNConc: FixedValue=0.016; Units=gN/gDM
          Memo Description
            The upper limit for N concentration in chicory roots seem to be similar to that of taproots and published data suggest values around 1.6-1.7% ([BausenweinEtAl_2001]; [ZagalEtAl_2001]; [JurgonskiEtAl_2011]).
        PhaseBasedSwitch NitrogenDemandSwitch: Start=Germination; End=Ripening
        PhaseLookup PartitionFraction
          Memo Description
            The chicory model allocates biomass below ground following a simple approach.  The amount allocated to below ground is computed based on the [TargetShootRootRatio].Value, and then the partiton between roots and taproot is controlled by the [TaprootRootRatio].Value).  There is only a few data in literature about the relative amounts of fine roots and taproots ([LiEtAl_1997a]; [LabreveuxThesis_2002]; [AlloushEtAl_2003]), so the parameterisation of DM partition should be revised when more data is available.
          PhaseLookupValue AllPhases: Start=Emergence; End=Ripening
            DivideFunction RootFraction
              MultiplyFunction Numerator
                VariableReference CurrentSR: VariableName=[ShootRootRatio].Value()
                VariableReference CurrentTR: VariableName=[TaprootRootRatio].Value()
              MultiplyFunction Denominator: same as Replacements.Chicory.Taproot.DMDemandFunction.PartitionFraction.AllPhases.TaprootFraction.Denominator
        Constant DMConversionEfficiency: FixedValue=1; Units=0-1
          Memo Description
            This is the default value for PMF.
        Constant MaintenanceRespirationFunction: FixedValue=0; Units=0-1
          Memo Description
            This is the default value for PMF.
        Constant MaximumRootDepth: FixedValue=1500; Units=mm
          Memo Description
            Chicory is typically describe as a deep rooted species and values of about 2.0 m have been reported ([LiKemp_2005]; [BrownThesis_2004]; [SapkotaEtAl_2012]).
        PhaseLookup RootFrontVelocity
          Memo Description
            Growth of roots are a priority for plants after germination and should slow down as plants grow; when in the reproductive phase growth is very much focused on above ground biomass.  Thus the chicory model assumes that growth rate of roots vary with phenological phase. No estimate value for the parameter was found, so it was set based on available information ([BrownThesis_2004]; [SapkotaEtAl_2012]) and general knowledge from other models.
          PhaseLookupValue PreEmergence: Start=Germination; End=Emergence
            Constant ReferenceVelocity: FixedValue=5; Units=mm/day
          PhaseLookupValue Vegetative: Start=Emergence; End=Bolting
            Constant ReferenceVelocity: FixedValue=10; Units=mm/day
          PhaseLookupValue Reproductive: Start=Bolting; End=Ripening
            Constant ReferenceVelocity: FixedValue=5; Units=mm/day
        Constant TemperatureEffect: FixedValue=1
          Memo
            No effect of temperature on root growth is currently captured in the model, as is the default for PMF.
        Constant SoilWaterEffect: FixedValue=1
          Memo
            No effect of soil water content on root growth is currently captured in the model, as is the default for PMF.
        Constant SpecificRootLength: FixedValue=40; Units=m/g
          Memo Description
            The PMF model converts root biomass into root length using the specific root length (SRL), and this may be used to regulate uptake processes.  Available data for chicory is highly variable and the disticntion between fine roots and taproot is not always considered, value range from 10 m/g for seedlings up to 100 m/g ([SandersonElwinger_2000a]; [LabreveuxThesis_2002]; [SapkotaEtAl_2012]; [LiuEtAl2015]; [CranstonEtAl_2016]).
        MultiplyFunction SenescenceRate
          Memo Description
            The rate of senescence for chicory roots is not really know, but it should be affected to enviromental factors, such as temperature and soil moisture.  Currently the reference rate is adjusted for temperature only, following general knowledge from other plant models.
          Constant ReferenceRate: FixedValue=0.005; Units=/day
          WeightedTemperatureFunction TemperatureFactor: MaximumTemperatureWeighting=0.5
            XYPairs: X=[0, 5, 15, 20, 30]; Y=[0, 0, 0.4, 1, 1]
          LinearInterpolationFunction SoilMoistureFactor: XProperty=[Arbitrator].FW
            XYPairs: X=[0, 0.5, 1]; Y=[1, 1, 1]
          Constant SoilAerationFactor: FixedValue=1
        Constant DMRetranslocationFactor: FixedValue=0; Units=/day
          Memo Description
            This is the default value for PMF.
        Constant DMReallocationFactor: FixedValue=0; Units=/day
          Memo Description
            This is the default value for PMF.
        Constant NRetranslocationFactor: FixedValue=0; Units=/day
          Memo Description
            This is the default value for PMF.
        Constant NReallocationFactor: FixedValue=0; Units=/day
          Memo Description
            This is the default value for PMF.
        LinearInterpolationFunction KLModifier: XProperty=[Root].LengthDensity
          XYPairs: X=[0, 1]; Y=[1, 1]
        LinearInterpolationFunction KNH4: XProperty=[Root].LengthDensity
          XYPairs: X=[0, 0.003]; Y=[0.01, 0.02]
        LinearInterpolationFunction KNO3: XProperty=[Root].LengthDensity
          XYPairs: X=[0, 0.003]; Y=[0.02, 0.03]
        Constant MaxDailyNUptake: FixedValue=10; Units=kgN/ha
          Memo Description
            This represent the upper limit for N uptake, its value should be affected by soil type (capacity for supply, or transport) as well as plant type (capacity to explore the soil volume).  The value used is based on general knowledge from other models.
            Note that atual uptake is regulated by soil water content and may be due to root density, so the value here is just the uppr limit.
        LinearInterpolationFunction NUptakeSWFactor: XProperty=[Root].RWC
          Memo Description
            This is used to down-regulate N uptake when there is water limitations in the soil, it accounts for the fact that transport of nutrient is reduced when soil moisture is low.
          XYPairs: X=[0, 0.5, 1]; Y=[0, 1, 1]
        CompositeBiomass Live: Propertys=[[Root].LayerLive]
        CompositeBiomass Dead: Propertys=[[Root].LayerDead]
        BiomassRemoval BiomassRemovalDefaults
          OrganBiomassRemovalType Cut: FractionLiveToRemove=0; FractionDeadToRemove=0; FractionLiveToResidue=0.05; FractionDeadToResidue=0
          OrganBiomassRemovalType Graze: FractionLiveToRemove=0; FractionDeadToRemove=0; FractionLiveToResidue=0.05; FractionDeadToResidue=0
          OrganBiomassRemovalType Harvest: FractionLiveToRemove=0; FractionDeadToRemove=0; FractionLiveToResidue=0.05; FractionDeadToResidue=0
          OrganBiomassRemovalType Prune: FractionLiveToRemove=0; FractionDeadToRemove=0; FractionLiveToResidue=0.05; FractionDeadToResidue=0
      CompositeBiomass AboveGround
        Propertys=[[Leaf].Live, [Leaf].Dead, [Stem].Live, [Stem].Dead, [Inflorescence].Live, [Inflorescence].Dead]
      CompositeBiomass AboveGroundLive: Propertys=[[Leaf].Live, [Stem].Live, [Inflorescence].Live]
      CompositeBiomass BelowGround: Propertys=[[Root].Live, [Root].Dead, [Taproot].Live, [Taproot].Dead]
      CompositeBiomass BelowGroundLive: Propertys=[[Root].Live, [Taproot].Live]
      CompositeBiomass Total
        Propertys=[[Leaf].Live, [Leaf].Dead, [Stem].Live, [Stem].Dead, [Inflorescence].Live, [Inflorescence].Dead, [Root].Live, [Root].Dead, [Taproot].Live, [Taproot].Dead]
      DivideFunction PerPlantBelowGroundWt
        Memo Description
          This represents the live biomass dry weight below ground for a specific plant (in g/plant)
        VariableReference BelowGroundWt: VariableName=[BelowGroundLive].Wt
        VariableReference Population: VariableName=[Chicory].Population
      PhaseLookup ShootRootRatio
        PhaseLookupValue AllPhases: Start=Emergence; End=Ripening
          DivideFunction CurrentSR
            VariableReference AbogeGroundDM: VariableName=[AboveGroundLive].StructuralWt
            VariableReference BelowGroundDM: VariableName=[BelowGroundLive].StructuralWt
      PhaseLookup TargetShootRootRatio
        Memo Description
          The target shoot:root ratio is used by the chicory model to ensure prompt regrowth after a defoliation event.   The model will change the allocation of new growth attempting to keep a balance in organ biomass distribution. This is a simplified approach to biomass allocation plasticity (e.g. [Wilson_1988]; [LevangBrilz_2002]), it assumes that the plant adjusts the allocation biomass whenever the current shoot:root ratio differs from the target value.
          Estimated values for the shoot:root ratio of chicory based on published data vary considerably and are linked to cultivar (e.g. [LiEtAl_1997a]; [ZagalEtAl_2001]; [BeleskyEtAl_2004]).  Varieties bred for root harvesting can have shoot:root ratios al low as 1.0 whereas for leaf cultivars the values may be up to around 5.0.  Data for forage chicory suggest values around 2.0 for adult plants ([LiEtAl_1997a]; [LabreveuxThesis_2002]; [AlloushEtAl_2003]; [CranstonEtAl_2015]).  This value is likely to be affected by environmental conditions, with water or nutrient deficit causing a shift towards root growth, while leaf growth is favoured during low light conditions.  However, these relationships can vary considerably in different plants or cultivars and little data is available for forage chicory.  The model currently does not account fort the influence of environmental factors on the shoot:root partition, but it does account for vernalisation.
          Stem elongation, or bolting, only occurs when chicory is vernalised and it has been shown happen in only a fraction of the plants in a sward each year ([ClaphamEtAl_2001]; [SandersonEtAl_2003]; [DielenEtAl_2005]).  This variation seems to be linked to the extent of vernalisation ([Gianquinto_1997]; [DielenEtAl_2005]).  Thus, to account for the growth of both bolting and non-bolting plants, the chicory model assumes that the changes in biomass allocation are a function of vernalisation as well as phenological phase.
        PhaseLookupValue Vegetative: Start=Emergence; End=Vernalised
          Constant TargetSR: FixedValue=1.5; Units=g/g
        PhaseLookupValue InductiveElongation: Start=Vernalised; End=Flowering
          AddFunction TargetSR
            VariableReference MinTargetSR: VariableName=[TargetShootRootRatio].Vegetative.TargetSR.Value()
            MultiplyFunction DeltaTarget
              SubtractFunction MaximumIncrease
                Constant MaxTargetSR: FixedValue=4; Units=g/g
                VariableReference MinTargetSR: VariableName=[TargetShootRootRatio].Vegetative.TargetSR.Value()
              LinearInterpolationFunction VernalisationEffect: XProperty=[Phenology].Vernalisation.DaysVernalised
                XYPairs: X=[9.9, 10, 20, 30, 40, 50, 60, 70, 80, 90, 100]; Y=[0, 0.05, 0.1, 0.18, 0.3, 0.45, 0.6, 0.8, 0.95, 1, 1]
              LinearInterpolationFunction StageEffect: XProperty=[Phenology].Stage
                XYPairs: X=[4, 4.1, 4.25, 4.5, 4.7, 5, 6]; Y=[0.01, 0.35, 0.65, 0.91, 0.98, 1, 1]
        PhaseLookupValue Reproductive: Start=Flowering; End=Ripening
          AddFunction TargetSR
            VariableReference MinTargetSR: VariableName=[TargetShootRootRatio].Vegetative.TargetSR.Value()
            MultiplyFunction PlusTarget
              SubtractFunction DeltaTarget
                VariableReference MaxTargetSR: VariableName=[TargetShootRootRatio].InductiveElongation.TargetSR.Value()
                VariableReference MinTargetSR: VariableName=[TargetShootRootRatio].Vegetative.TargetSR.Value()
              LinearInterpolationFunction StageEffect: XProperty=[Phenology].Stage
                XYPairs: X=[6, 6.25, 6.4, 6.6, 6.8, 6.9, 7]; Y=[1, 1, 0.95, 0.75, 0.25, 0.05, 0]
      PhaseLookup AdjustedShootRootRatio
        PhaseLookupValue AllPhases: Start=Emergence; End=Ripening
          MultiplyFunction AdjustedSR
            VariableReference TargetSR: VariableName=[TargetShootRootRatio].Value()
            DivideFunction SRfactor
              VariableReference TargetSR: VariableName=[TargetShootRootRatio].Value()
              MaximumFunction CurrentSRx
                VariableReference CurrentSR: VariableName=[ShootRootRatio].Value()
                Constant MinCurrentSR: FixedValue=1E-09; Units=g/g
      PhaseLookup StemsLeafRatio
        PhaseLookupValue AllPhasesWithStems: Start=Bolting; End=Ripening
          DivideFunction CurrentSL
            AddFunction StemFlowerDM
              VariableReference StemDM: VariableName=[Stem].Live.Wt
              VariableReference InflorescenceDM: VariableName=[Inflorescence].Live.Wt
            VariableReference LeafDM: VariableName=[Leaf].Live.Wt
      PhaseLookup TargetStemsLeafRatio
        Memo Description
          The chicory model will change the allocation of biomass above ground attempting to keep a given proportion among the various organs.  The allocation of biomass to leaves is defined primarily by the target shoo:root ratio, but during the stem elongation and reproductive phases, the partition is modified favouring stems and inflorescence.  This is controlled by the target ratio of stems+inflorescence to leaves. This ratio may be affected by defoliation ([ClarkEtAl_1990a]; [LiEtAl_1994]; [QuijadaThesis_2015]) and is probably affected by enviromental factors too. There is not enough data to describe these interactions.
          The allocation of biomass to stems is difficult to inferr because there are many confounding issues, such as growth stage, vernalisation level, graze intensity, etc.  Under lax grazing conditions and after some vernalisation, stem fraction is about 25-50%, but can be as high as 70%, values around 15-25% are reported for intensive grazing ([ClarkEtAl_1990b]; [LiEtAl_1994]; [JungEtAl_1996]; [LiEtAl_1997a]; [LiEtAl_1997c]).  The Stem:leaf ratio is thus between 0.25 and 1.0 for grazed plants.
          Bolting only occur in a fraction of plant each year, around 50% ([ClaphamEtAl_2001]; [SandersonEtAl_2003]; [DielenEtAl_2005]). So, as a compromise, it assumed in the chicory model that the stem:leaf ratio increases sharply at the beginning of the stem elongation phase, reaching a maximum value and then is constant until near the end of flowering when if decreases again.  This maximum should be not too high to account for non bolting plants.
        PhaseLookupValue AllPhasesWithStems: Start=Bolting; End=Ripening
          MultiplyFunction TargetSL
            Constant MaximumSL: FixedValue=1; Units=g/g
            VariableReference VernalisationEffect
              VariableName=[TargetShootRootRatio].InductiveElongation.TargetSR.DeltaTarget.VernalisationEffect.Value()
            LinearInterpolationFunction StageEffect: XProperty=[Phenology].Stage
              XYPairs: X=[5, 5.1, 5.25, 5.4, 5.5, 6.5, 6.75, 7]; Y=[0.1, 0.45, 0.8, 0.97, 1, 1, 0.9, 0.5]
      PhaseLookup FlowerStemRatio
        PhaseLookupValue Reproductive: Start=Flowering; End=Ripening
          DivideFunction CurrentFS
            VariableReference InflorescenceDM: VariableName=[Inflorescence].Live.Wt
            VariableReference StemDM: VariableName=[Stem].Live.Wt
      PhaseLookup TargetFlowerStemRatio
        Memo Description
          The allocation of biomass during the reproductive phase will attempt to keep a ratio between stem and inflorescence biomass.  This ratio is difficult to define as there is little data available and because of the flowering behaviour of chicory (plants can have ripe seeds as well as young flower buds at the same time).  Inference from published values suggest that the ratio of flower biomass to stems should be around 0.1 ([HareEtAl_1990]; [ClarkEtAl_1990a]; [JungEtAl_1996]; [ClaphamEtAl_2001]).
        PhaseLookupValue Reproductive: Start=Flowering; End=Ripening
          MultiplyFunction TargetSL
            Constant MaximumFS: FixedValue=0.1; Units=g/g
            LinearInterpolationFunction StageEffect: XProperty=[Phenology].Stage
              XYPairs: X=[6, 6.1, 6.25, 6.4, 6.5, 7]; Y=[0.05, 0.4, 0.75, 0.96, 1, 1]
      PhaseLookup TaprootRootRatio
        PhaseLookupValue AllPhases: Start=Emergence; End=Ripening
          DivideFunction CurrentTR
            VariableReference TaprootDM: VariableName=[Taproot].Live.Wt
            VariableReference RootsDM: VariableName=[Root].Live.Wt
      PhaseLookup TargetTaprootRootRatio
        Memo Description
          The chicory model assumes that biomass is allocated to the various organs in a manner to mantain a given proportion each each organ (this can vary with phenological phase and other factors).  The ratio between taproot and root biomass is assumed to increase as the biomass below ground per plant increases, but it approaches a maximum target asymptotically.  This is a simple approach and can describe the general behaviour of chicory plants, it may be upgraded if deemed necessary when more data becomes available.
        PhaseLookupValue AllPhases: Start=Emergence; End=Ripening
          MultiplyFunction TargetTR
            Constant MaximumTR: FixedValue=2; Units=g/g
            LinearInterpolationFunction BiomassFactor: XProperty=[PerPlantBelowGroundWt].Value()
              XYPairs: X=[0, 0.05, 0.5, 1, 1.5, 2, 2.5]; Y=[1E-05, 1E-05, 0.4, 0.74, 0.93, 1, 1]
      CultivarFolder Cultivars
        Cultivar Puna
          Memo Description
            *Puna* is the basic forage chicory cultivar. It represents one of the first chicory cultivars selected for seed production and it has been used for forage grazing, in monoculture or in mixed swards, in several countries worldwide.
        Cultivar Choice
          Command:
            [Leaf].Photosynthesis.FT.XYPairs.X = 4, 10, 15, 20, 26, 34
            [Leaf].Photosynthesis.FT.XYPairs.Y = 0.0, 0.1, 0.4, 1.0, 1.0, 0.0
          Memo Description
            *Choice* is forage chicory cultivar derived from *Puna*, to which it is very similar.  It has advertised as a winter active forage and is commonly used in monoculture swards.
    Manager Defoliate
      Crop =
      cutPasture_StartDate = 2050-05-20
      cutPasture_EndDate = 2100-12-31
      defoliateType = Graze
      interval2Cut = 21
      durationOfCut = 1
      removeAmountType = DMToRemove
      herbageAmount = 500
      fracDM2Remove = 1
      fracN2Remove = 1
      urineDepth = 10
      fracN2Dung = 0.4
      fracPopDecline = 0.05
```csharp
// Defoliates on a regular cycle or one-off via a schedule
// currently defoliates by the amount specified spread evenly over the specified period

using System;
using Models.Core;
using System.Collections.Generic;
using System.Text;
using Models;
using Models.Soils;
using Models.PMF;
using System.Xml.Serialization;
using APSIM.Shared.Utilities;

namespace Models
{
	[Serializable]
	public class Script : Model
	{
		[Link] Zone zone;
		[Link] Clock Clock;
		[Link] Plant Chicory;
		[Link] Fertiliser fertiliser;
		[Link] ISummary summary = null;

		[Description("Choose the crop to harvest:")]
		public ICrop Crop { get; set; }

		[Description("Enter the date to start the rotation (dd/mm/yyyy):")]
		public DateTime cutPasture_StartDate { get; set; }

		[Description("Enter the date to end the rotation (dd/mm/yyyy):")]
		public DateTime cutPasture_EndDate { get; set; }

		[Description("Select type of defoliation:")]
		public defoliationTypes defoliateType { get; set; }

		[Description("Enter the interval between defoliations (days):")]
		public int interval2Cut { get; set; }

		[Description("Enter the number of days to defoliate over (days):")]
		public int durationOfCut { get; set; }

		[Description("Choose what amount is being defined:")]
		public removeAmountTypes removeAmountType { get; set; }

		[Description("Enter the amount to use (kgDM/ha):")]
		public double herbageAmount { get; set; }

		[Description("Enter the fraction of DM that is removed from the field (0-1):")]
		public double fracDM2Remove { get; set; }

		[Description("Enter the fraction of N that is removed from the field (0-1):")]
		public double fracN2Remove { get; set; }

		[Description("Enter the depth down to which urine will applied (mm):")]
		public double urineDepth { get; set; }

		[Description("Enter the proportion of N returned in dung (0-1):")]
		public double fracN2Dung { get; set; }

		[Description("Enter the fraction of population decline due to defoliation (0-1):")]
		public double fracPopDecline { get; set; }

		//fraction of each plant part returned as residue (0-1), wastage
		private double leafResidueFrac = 0.01;
		private double stemResidueFrac = 0.01;
		private double flowerResidueFrac = 0.01;
		private double minLeafAmount = 5.0;

		//Outputs
		//Pasture DM defoliated today (kg/ha)
		[XmlIgnore] public double DefoliatedDM{ get; set; }
		//N defoliate today
		[XmlIgnore] public double DefoliatedN{ get; set; }
		//Pasture DM harvested today (kg/ha)
		[XmlIgnore] public double HarvestedDM{ get; set; }
		//N harvested today
		[XmlIgnore] public double HarvestedN{ get; set; }
		//DM removed from the paddock
		[XmlIgnore] public double RemovedDM{ get; set; }
		//N removed from the paddock
		[XmlIgnore] public double RemovedN{ get; set; }
		//DM returned to the paddock
		[XmlIgnore] public double ReturnedDM{ get; set; }
		//N returned to the paddock
		[XmlIgnore] public double ReturnedN{ get; set; }
		//N returned as dung (SurfaceOM)
		[XmlIgnore] public double NReturnedInDung{ get; set; }
		//N returned as urine (urea)
		[XmlIgnore] public double NReturnedInUrine{ get; set; }
		//Number of days after last harvest
		[XmlIgnore] public int DaysAfterCut{ get; set; }
		//Total standing DM (Leaf + Stem/Sheath) before cut
		[XmlIgnore] public double PreHarvestDM{ get; set; }
		//Total standing DM (Leaf + Stem/Sheath) after cut
		[XmlIgnore] public double PostHarvestDM{ get; set; }

		//Pasture DM harvested this rotation (kg/ha)
		[XmlIgnore] public double RotationHarvestedDM{ get; set; }
		//Pasture DM to be harvested this rotation (kg/ha)
		[XmlIgnore] public double RotationHarvestingDM{ get; set; }

		//Internal variables
		private RemovalFractions removalFractions;
		//The fraction of urine to be applied in each layer
		private double[] FracLayer;
		// total herbage to remove in g/m2 per day
		private double herbageToRemove;
		// counter
		private int daysCutting = 0;
		// type of defoliation (Cut or Graze)
		private string defoliationType;
		// type of DM amount (ResidualDM or DMToRemove)
		private string amountType;
		// auxiliary
		private bool aCutHasHappened = false;
		private bool isStillCutting = false;
		private double cumAmountHarvested;

		// event to add residue / dung to surface OM
		public event BiomassRemovedDelegate BiomassRemoved;

		[EventSubscribe("Commencing")]
		private void OnSimulationCommencing(object sender, EventArgs e)
		{
			removalFractions = new RemovalFractions();
			DaysAfterCut = 0;
			resetVariables();
			if (defoliateType == defoliationTypes.Cut)
				defoliationType = "Cut";
			else
				defoliationType = "Graze";

			if (removeAmountType == removeAmountTypes.ResidualDM)
				amountType = "ResidualDM";
			else
				amountType = "DMToRemove";

			// make sure that rotation start when startDate<simulationStartDay
			if ((Clock.Today > cutPasture_StartDate) && (Clock.Today < cutPasture_EndDate))
				cutPasture_StartDate = Clock.Today;
		}

		[EventSubscribe("DoManagement")]
		private void OnDoManagement(object sender, EventArgs e)
		{
			if (Clock.Today == cutPasture_StartDate)
				DaysAfterCut = interval2Cut;

			if ((Clock.Today >= cutPasture_StartDate) && (Clock.Today <= cutPasture_EndDate))
			{
				// Check whether we should start cutting
				if ((Chicory.IsEmerged) && (DaysAfterCut > 0) && (DaysAfterCut == interval2Cut))
				{
					Defoliate(defoliationType, herbageAmount * 0.1, amountType, durationOfCut);
				}
			}

			// Check whether we need to continue cutting
			//if ((daysCutting > 0) && (daysCutting <= durationOfCut))
			if (isStillCutting)
			{
				// reset outputs
				resetVariables();

				removeDM(herbageToRemove, defoliationType);
				returnExcreta();
				cumAmountHarvested += HarvestedDM;
				daysCutting += 1;
			}

			// reset outputs
			if (daysCutting < 0)
			{
				resetVariables();
				daysCutting = 0;
			}
		}

		[EventSubscribe("DoManagementCalculations")]
		private void OnDoManagementCalculations(object sender, EventArgs e)
		{
			if ((daysCutting > 0) && (daysCutting < durationOfCut))
				isStillCutting = true;

			if (daysCutting == durationOfCut)
			{
				PostHarvestDM = (double)zone.Get("Chicory.AboveGround.Wt");
				RotationHarvestedDM = cumAmountHarvested;
				aCutHasHappened = true;
				isStillCutting = false;
				daysCutting = -1;
				Chicory.Population = Chicory.Population * (1.0 - fracPopDecline);
			}

			if (aCutHasHappened && (daysCutting == 0))
				DaysAfterCut += 1;
		}

		public enum removeAmountTypes
		{
			/// <summary>Setting DM amount to remove</summary>
			DMToRemove,
			/// <summary>Setting residual DM amount</summary>
			ResidualDM
		}

		public enum defoliationTypes
		{
			/// <summary>Cut</summary>
			Cut,
			/// <summary>Graze</summary>
			Graze
		}

		// resets the values of all outputs
		private void resetVariables()
		{
			DefoliatedDM = 0.0;
			DefoliatedN = 0.0;
			HarvestedDM = 0.0;
			HarvestedN = 0.0;
			RemovedDM = 0.0;
			RemovedN = 0.0;
			ReturnedDM = 0.0;
			ReturnedN = 0.0;
			NReturnedInDung = 0.0;
			NReturnedInUrine = 0.0;
			RotationHarvestedDM = 0.0;
			RotationHarvestingDM = 0.0;
		}

		// Perform the basic calculations for defoliation
		public void Defoliate(string defoliationType, double amountDM, string amountType, int duration)
		{
			// get the existing plant amount
			PreHarvestDM = (double)zone.Get("Chicory.AboveGround.Wt");

			// check duration
			if (duration <= 0)
				throw new Exception("Duration of graze/cut rotation is zero or negative");
			
			// check amount to remove
			if ((amountType == "DMToRemove") && (PreHarvestDM > 0.0))
			{
				summary.WriteMessage(this, "   Defoliating " + (10.0 * amountDM).ToString("#0.0") + "kg/ha over " + duration + " days");
				herbageToRemove = amountDM / duration;
			}
			else if ((amountType == "ResidualDM") && (PreHarvestDM > amountDM))
			{
				summary.WriteMessage(this, "   Defoliating down to approximately " + (10.0 * amountDM).ToString("#0.0") + "kg/ha over " + duration + " days");
				herbageToRemove = (PreHarvestDM - amountDM) / duration;
			}
			else
			{
				herbageToRemove = 0.0;
				summary.WriteMessage(this, "   Defoliation will not happend because there is not enough plant material");
				return;
			}

			RotationHarvestingDM = herbageToRemove * duration;
			durationOfCut = duration;
			// first defoliation
			removeDM(herbageToRemove, defoliationType);
			returnExcreta();
			cumAmountHarvested = HarvestedDM;
			daysCutting = 1;
			DaysAfterCut = 0;
		}

		private void removeDM(double removeAmount, string removeType)
		{
			// get the existing biomass
			double leafLiveWt = (double)zone.Get("Chicory.Leaf.Live.Wt");
			double stemLiveWt = (double)zone.Get("Chicory.Stem.Live.Wt");
			double flowerLiveWt = (double)zone.Get("Chicory.Inflorescence.Live.Wt");
			double leafDeadWt = (double)zone.Get("Chicory.Leaf.Dead.Wt");
			double stemDeadWt = (double)zone.Get("Chicory.Stem.Dead.Wt");
			double flowerDeadWt = (double)zone.Get("Chicory.Inflorescence.Dead.Wt");
			double leafLiveN = (double)zone.Get("Chicory.Leaf.Live.N");
			double stemLiveN = (double)zone.Get("Chicory.Stem.Live.N");
			double flowerLiveN = (double)zone.Get("Chicory.Inflorescence.Live.N");
			double leafDeadN = (double)zone.Get("Chicory.Leaf.Dead.N");
			double stemDeadN = (double)zone.Get("Chicory.Stem.Dead.N");
			double flowerDeadN = (double)zone.Get("Chicory.Inflorescence.Dead.N");

			double existingWt = leafLiveWt + leafDeadWt + stemLiveWt + stemDeadWt + flowerLiveWt + flowerDeadWt;
			double existingN = leafLiveN + leafDeadN + stemLiveN + stemDeadN + flowerLiveN + flowerDeadN;

			// Can we harvest anything?
			double removingWt = Math.Min(existingWt, removeAmount);
			if (removingWt > 0.0)
			{
				// get the fractions to remove for each organ (will override the default values)
				// the default is [Chicory].Leaf.BiomassRemovalDefaults.Cut.FractionRemoved, or equivalent
				// >> double leafFracToRemove = removeAmount * (leafLiveWt + leafDeadWt) / existingWt / existingWt;
				double fracToRemove = removingWt / existingWt;
				double leafFracToRemove = 0.0;
				if ((leafLiveWt + leafDeadWt) > 0.0)
				{
					if (leafLiveWt < minLeafAmount)
					{
						// leafWt cannot go below a minimum
						leafFracToRemove = (removingWt + leafLiveWt - minLeafAmount) / existingWt;
					}
					else
						leafFracToRemove = fracToRemove;
				}

				double stemFracToRemove = ((stemLiveWt + stemDeadWt) > 0.0) ? fracToRemove : 0.0;
				double flowerFracToRemove = ((flowerLiveWt + flowerDeadWt) > 0.0) ? fracToRemove : 0.0;

				// get the fractions to residue (i.e. wastage - will override the default values)
				// the default is [Chicory].Leaf.BiomassRemovalDefaults.Cut.FractionToResidue, or equivalent
				double leafFracToResidue = leafResidueFrac * leafFracToRemove;
				double stemFracToResidue = stemResidueFrac * stemFracToRemove;
				double flowerFracToResidue = flowerResidueFrac * flowerFracToRemove;

				// correct the values to defoliate (so our removing = remove + residue)
				leafFracToRemove -= leafFracToResidue;
				stemFracToRemove -= stemFracToResidue;
				flowerFracToRemove -= flowerFracToResidue;

				// set removal fractions (these overrides the default removals in the plant)
				removalFractions.SetFractionToRemove("Leaf", leafFracToRemove, "Live");
				removalFractions.SetFractionToResidue("Leaf", leafFracToResidue, "Live");
				removalFractions.SetFractionToRemove("Leaf", leafFracToRemove, "Dead");
				removalFractions.SetFractionToResidue("Leaf", leafFracToResidue, "Dead");
				removalFractions.SetFractionToRemove("Stem", stemFracToRemove, "Live");
				removalFractions.SetFractionToResidue("Stem", stemFracToResidue, "Live");
				removalFractions.SetFractionToRemove("Stem", stemFracToRemove, "Dead");
				removalFractions.SetFractionToResidue("Stem", stemFracToResidue, "Dead");
				removalFractions.SetFractionToRemove("Inflorescence", flowerFracToRemove, "Live");
				removalFractions.SetFractionToResidue("Inflorescence", flowerFracToResidue, "Live");
				removalFractions.SetFractionToRemove("Inflorescence", flowerFracToRemove, "Dead");
				removalFractions.SetFractionToResidue("Inflorescence", flowerFracToResidue, "Dead");

				removalFractions.SetFractionToRemove("Root", 0.0);
				removalFractions.SetFractionToResidue("Root", 0.0);
				removalFractions.SetFractionToRemove("Taproot", 0.0);
				removalFractions.SetFractionToResidue("Taproot", 0.0);

				// Actually do the biomass removal
				Chicory.RemoveBiomass(removeType, removalFractions);

				// get the new existing plant amount
				double postHarvestWt = (double)zone.Get("Chicory.AboveGround.Wt");
				double postHarvestN = (double)zone.Get("Chicory.AboveGround.N");

				// get total defoliation (total plant stuff lost)
				DefoliatedDM = existingWt - postHarvestWt;
				DefoliatedN = existingN - postHarvestN;

				// get total harvested (plant stuff removed from plants)
				HarvestedDM = (double)zone.Get("Chicory.Leaf.Removed.Wt")
				+ (double)zone.Get("Chicory.Stem.Removed.Wt")
				+ (double)zone.Get("Chicory.Inflorescence.Removed.Wt");
				HarvestedN = (double)zone.Get("Chicory.Leaf.Removed.N")
				+ (double)zone.Get("Chicory.Stem.Removed.N")
				+ (double)zone.Get("Chicory.Inflorescence.Removed.N");

				// get amounts actually removed from field and that to be returned (residue or dung/urine)
				RemovedDM = HarvestedDM * fracDM2Remove;
				RemovedN = HarvestedN * fracN2Remove;
				ReturnedDM = HarvestedDM - RemovedDM;
				ReturnedN = HarvestedN - RemovedN;
				NReturnedInDung = ReturnedN * fracN2Dung;
				NReturnedInUrine = ReturnedN - NReturnedInDung;
			}
			else
			{
			}
		}

		// Return dung and urine
		private void returnExcreta()
		{
			if ((ReturnedDM > 0.0) || (NReturnedInDung > 0.0))
			{
				PMF.BiomassRemovedType BiomassDung = new PMF.BiomassRemovedType();
				string[] type = new string[] { "RuminantDung_PastureFed" };
				float[] dltdm = new float[] { (Single)ReturnedDM };
				float[] dltn = new float[] { (Single)NReturnedInDung };
				float[] dltp = new float[] { 0 };
				float[] fraction = new float[] { 1 };     // fraction is always 1.0 here

				BiomassDung.crop_type = "RuminantDung_PastureFed";
				BiomassDung.dm_type = type;
				BiomassDung.dlt_crop_dm = dltdm;
				BiomassDung.dlt_dm_n = dltn;
				BiomassDung.dlt_dm_p = dltp;
				BiomassDung.fraction_to_residue = fraction;
				BiomassRemoved.Invoke(BiomassDung);
			}

			if (NReturnedInUrine > 0.0)
			{
				fertiliser.Apply(NReturnedInUrine * 10, Fertiliser.Types.UreaN, urineDepth);
			}
		}
	}
}
```
    Manager ExtraVariables
```csharp
using System;
using Models.Core;
using System.Collections.Generic;
using System.Text;
using Models.Soils;
using Models.PMF;
using Models;
using System.Xml.Serialization;
using APSIM.Shared.Utilities;

namespace Models
{
	[Serializable] 
	public class Script : Model
	{
		[Link] Clock Clock;
		[Link] Soils.Soil Soil;
		[Link] Models.SurfaceOM.SurfaceOrganicMatter SOM;
		[Link] Weather Met;
		[Link] Fertiliser Fert;
		[Link] Irrigation Irrig;
		[Link] Plant Chicory;
		[Link] Zone zone;
		[Link] ISummary summary;
					
		[XmlIgnore] public bool InitialDay { get; set; }
		
		[XmlIgnore] public double AccumPlantN { get; set; }
		[XmlIgnore] public double AccumMineralisation { get; set; }
		[XmlIgnore] public double AccumDenit { get; set; }
		[XmlIgnore] public double AccumFert { get; set; }
		[XmlIgnore] public double AccumLeach { get; set; }
		[XmlIgnore] public double AccumDetach { get; set; }
		[XmlIgnore] public double DeltaSoilOMN { get; set; }
		[XmlIgnore] public double DeltaSurfaceOMN { get; set; }
		[XmlIgnore] public double DeltaSoilMineralN { get; set; }
		[XmlIgnore] public double SoilNitrogenContent { get; set; }
		
		[XmlIgnore] public double AccumEO { get; set; }
		[XmlIgnore] public double AccumEP { get; set; }
		[XmlIgnore] public double AccumES { get; set; }
		[XmlIgnore] public double AccumDrainage { get; set; }
		[XmlIgnore] public double AccumRunoff { get; set; }
		[XmlIgnore] public double AccumOutflowLat { get; set; }
		[XmlIgnore] public double AccumIrrigation { get; set; }
		[XmlIgnore] public double AccumRainfall { get; set; }
		[XmlIgnore] public double SoilWaterDeficit { get; set; }
	
		[XmlIgnore] public double  InitialSoilOMN { get; set; }
		[XmlIgnore] public double  InitialSurfaceOMN { get; set; }
		[XmlIgnore] public double  InitialMineralN { get; set; }
		
		[XmlIgnore] public double SWC { get; set; }
		[XmlIgnore] public double DUL { get; set; }
		[XmlIgnore] public double OutFlowLat { get; set; }

		[XmlIgnore] public double FomN { get; set; }
		[XmlIgnore] public double BiomN { get; set; }
		[XmlIgnore] public double HumN { get; set; }
		[XmlIgnore] public double OrganicN { get; set; }
		[XmlIgnore] public double NO3N { get; set; }
		[XmlIgnore] public double NH4N { get; set; }
		[XmlIgnore] public double UreaN { get; set; }
		[XmlIgnore] public double MineralN { get; set; }
		[XmlIgnore] public double DltNMinRes { get; set; }
		[XmlIgnore] public double DltNMinTot { get; set; }
		
		[XmlIgnore] public double LeafFraction { get; set; }
		[XmlIgnore] public double StemFraction { get; set; }
		[XmlIgnore] public double InflorescenceFraction { get; set; }
		
		[XmlIgnore] public double ShootRootRatio { get; set; }

		[XmlIgnore] public double Leaf_DMSupply { get; set; }
		[XmlIgnore] public double Stem_DMSupply { get; set; }
		[XmlIgnore] public double Inflorescence_DMSupply { get; set; }
		[XmlIgnore] public double Root_DMSupply { get; set; }
		[XmlIgnore] public double Taproot_DMSupply { get; set; }
		[XmlIgnore] public double Leaf_DMDemand { get; set; }
		[XmlIgnore] public double Stem_DMDemand { get; set; }
		[XmlIgnore] public double Inflorescence_DMDemand { get; set; }
		[XmlIgnore] public double Root_DMDemand { get; set; }
		[XmlIgnore] public double Taproot_DMDemand { get; set; }
		[XmlIgnore] public double Root_NSupply { get; set; }
		
		[XmlIgnore] public double Leaf_NSupplyReallocation { get; set; }
		[XmlIgnore] public double Stem_NSupplyReallocation { get; set; }
		[XmlIgnore] public double Root_NSupplyReallocation { get; set; }
		
		[EventSubscribe("Commencing")]
		private void OnSimulationCommencing(object sender, EventArgs e)
		{
			InitialDay = true;
		}
		
		[EventSubscribe("DoManagement")]
		private void OnDoManagement(object sender, EventArgs e)
		{
			//!!!!!! Nitrogen balance components !!!!!!
			//!!!!!!^^^^^^^^^^^^^^^^^^^^^^^^^^^^^!!!!!!
			FomN = MathUtilities.Sum(Soil.SoilNitrogen.FOMN);
			HumN = MathUtilities.Sum(Soil.SoilNitrogen.HumicN);
			BiomN = MathUtilities.Sum(Soil.SoilNitrogen.MicrobialN);
			OrganicN = FomN + HumN + BiomN;
			NO3N = MathUtilities.Sum(Soil.NO3N);
			NH4N = MathUtilities.Sum(Soil.NH4N);
			UreaN = MathUtilities.Sum(Soil.SoilNitrogen.urea);
			MineralN = NO3N + NH4N + UreaN; 
			DltNMinRes = MathUtilities.Sum(Soil.SoilNitrogen.dlt_n_min_res);
			DltNMinTot = MathUtilities.Sum(Soil.SoilNitrogen.MineralisedN);
			int layers = Soil.Thickness.Length;
			if (InitialDay == true)
			{
				InitialSurfaceOMN = SOM.N;
				InitialSoilOMN = OrganicN;
				InitialMineralN = MineralN;
				InitialDay = false;
			}
			DeltaSurfaceOMN = SOM.N - InitialSurfaceOMN;
			AccumLeach = AccumLeach - Soil.SoilWater.LeachNH4 - Soil.SoilWater.LeachNO3 - Soil.SoilWater.LeachUrea; //Fails
			AccumMineralisation += MathUtilities.Sum(Soil.SoilNitrogen.MineralisedN);
			AccumDenit -= MathUtilities.Sum(Soil.SoilNitrogen.Denitrification);
			AccumPlantN -= (double)zone.Get("Chicory.Root.NUptake");
			DeltaSoilOMN = OrganicN - InitialSoilOMN;
			DeltaSoilMineralN = MineralN - InitialMineralN;
			SoilNitrogenContent = MineralN;
			
			//!!!!!! Water balance components !!!!!!
			//!!!!!!^^^^^^^^^^^^^^^^^^^^^^^^^^!!!!!!

			AccumRainfall += Met.Rain;
			//AccumEP -= (double)zone.Get("[Chicory].Leaf.Transpiration");
			AccumEP -= (double)zone.Get("Chicory.Root.WaterUptake");
			SoilWaterDeficit = (SWC - DUL);
			double OutFlowLat = MathUtilities.Sum(Soil.SoilWater.outflow_lat);
			AccumOutflowLat -= OutFlowLat;
			
			//!!!!!! Stem and leaf fraction !!!!!!
			if ((double)zone.Get("Chicory.AboveGround.Wt") > 0)
			{
				LeafFraction = (double)zone.Get("Chicory.Leaf.Wt") / (double)zone.Get("Chicory.AboveGround.Wt");
				StemFraction = (double)zone.Get("Chicory.Stem.Wt") / (double)zone.Get("Chicory.AboveGround.Wt");
				InflorescenceFraction = (double)zone.Get("Chicory.Inflorescence.Wt") / (double)zone.Get("Chicory.AboveGround.Wt");
			}
			else
			{
				LeafFraction = 0;
				StemFraction = 0;
			}
			
			//!!!!!! Plant DM components !!!!!!
			//!!!!!!^^^^^^^^^^^^^^^^^^^^^^^^^^!!!!!!
			ShootRootRatio = MathUtilities.Divide((double)zone.Get("Chicory.AboveGroundLive.Wt"), (double)zone.Get("Chicory.BelowGroundLive.Wt"), 0.0);
			PMF.Interfaces.BiomassSupplyType Leaf_DMSupplies = (PMF.Interfaces.BiomassSupplyType)zone.Get("Chicory.Leaf.DMSupply");
			PMF.Interfaces.BiomassSupplyType Stem_DMSupplies = (PMF.Interfaces.BiomassSupplyType)zone.Get("Chicory.Stem.DMSupply");
			PMF.Interfaces.BiomassSupplyType Inflorescence_DMSupplies = (PMF.Interfaces.BiomassSupplyType)zone.Get("Chicory.Inflorescence.DMSupply");
			PMF.Interfaces.BiomassSupplyType Root_DMSupplies = (PMF.Interfaces.BiomassSupplyType)zone.Get("Chicory.Root.DMSupply");
			PMF.Interfaces.BiomassSupplyType Taproot_DMSupplies = (PMF.Interfaces.BiomassSupplyType)zone.Get("Chicory.Taproot.DMSupply");
			PMF.Interfaces.BiomassPoolType Leaf_DMDemands = (PMF.Interfaces.BiomassPoolType)zone.Get("Chicory.Leaf.DMDemand");
			PMF.Interfaces.BiomassPoolType Stem_DMDemands = (PMF.Interfaces.BiomassPoolType)zone.Get("Chicory.Stem.DMDemand");
			PMF.Interfaces.BiomassPoolType Inflorescence_DMDemands = (PMF.Interfaces.BiomassPoolType)zone.Get("Chicory.Inflorescence.DMDemand");
			PMF.Interfaces.BiomassPoolType Root_DMDemands = (PMF.Interfaces.BiomassPoolType)zone.Get("Chicory.Root.DMDemand");
			PMF.Interfaces.BiomassPoolType Taproot_DMDemands = (PMF.Interfaces.BiomassPoolType)zone.Get("Chicory.Taproot.DMDemand");

			PMF.Interfaces.BiomassSupplyType Leaf_NSupplies = (PMF.Interfaces.BiomassSupplyType)zone.Get("Chicory.Leaf.NSupply");
			PMF.Interfaces.BiomassSupplyType Stem_NSupplies = (PMF.Interfaces.BiomassSupplyType)zone.Get("Chicory.Stem.NSupply");
			PMF.Interfaces.BiomassSupplyType Root_NSupplies = (PMF.Interfaces.BiomassSupplyType)zone.Get("Chicory.Root.NSupply");
			
			Leaf_DMSupply = Leaf_DMSupplies.Fixation + Leaf_DMSupplies.Uptake + Leaf_DMSupplies.Reallocation + Leaf_DMSupplies.Retranslocation;
			Stem_DMSupply = Stem_DMSupplies.Fixation + Stem_DMSupplies.Uptake + Stem_DMSupplies.Reallocation + Stem_DMSupplies.Retranslocation;
			Inflorescence_DMSupply = Inflorescence_DMSupplies.Fixation + Inflorescence_DMSupplies.Uptake + Inflorescence_DMSupplies.Reallocation + Inflorescence_DMSupplies.Retranslocation;
			Root_DMSupply = Root_DMSupplies.Fixation + Root_DMSupplies.Uptake + Root_DMSupplies.Reallocation + Root_DMSupplies.Retranslocation;
			Taproot_DMSupply = Taproot_DMSupplies.Fixation + Taproot_DMSupplies.Uptake + Taproot_DMSupplies.Reallocation + Taproot_DMSupplies.Retranslocation;
			Leaf_DMDemand = Leaf_DMDemands.Structural + Leaf_DMDemands.NonStructural + Leaf_DMDemands.Metabolic;
			Stem_DMDemand = Stem_DMDemands.Structural + Stem_DMDemands.NonStructural + Stem_DMDemands.Metabolic;
			Inflorescence_DMDemand = Inflorescence_DMDemands.Structural + Inflorescence_DMDemands.NonStructural + Inflorescence_DMDemands.Metabolic;
			Root_DMDemand = Root_DMDemands.Structural + Root_DMDemands.NonStructural + Root_DMDemands.Metabolic;
			Taproot_DMDemand = Taproot_DMDemands.Structural + Taproot_DMDemands.NonStructural + Taproot_DMDemands.Metabolic;
			Root_NSupply = Root_NSupplies.Fixation + Root_NSupplies.Uptake + Root_NSupplies.Reallocation + Root_NSupplies.Retranslocation;

			Leaf_NSupplyReallocation = Leaf_NSupplies.Reallocation;
			Stem_NSupplyReallocation = Stem_NSupplies.Reallocation;
			Root_NSupplyReallocation = Root_NSupplies.Reallocation;
			
			//summary.WriteMessage(this, "   Root.Fixation: " + Root_NSupplies.Fixation.ToString());
			//summary.WriteMessage(this, "   Root.Uptake: " + Root_NSupplies.Uptake.ToString());
			//summary.WriteMessage(this, "   Root.Reallocation: " + Root_NSupplies.Reallocation.ToString());
			//summary.WriteMessage(this, "   Root.Retranslocation: " + Root_NSupplies.Retranslocation.ToString());
			//summary.WriteMessage(this, "   Stem.Fixation: " + Stem_NSupplies.Fixation.ToString());
			//summary.WriteMessage(this, "   Stem.Uptake: " + Stem_NSupplies.Uptake.ToString());
			//summary.WriteMessage(this, "   Stem.Reallocation: " + Stem_NSupplies.Reallocation.ToString());
			//summary.WriteMessage(this, "   Stem.Retranslocation: " + Stem_NSupplies.Retranslocation.ToString());	
	
			
		}
		
		[EventSubscribe("DoManagementCalculations")]
		private void OnDoManagementCalculations(object sender, EventArgs e)
		{
			FomN = MathUtilities.Sum(Soil.SoilNitrogen.FOMN);
			HumN = MathUtilities.Sum(Soil.SoilNitrogen.HumicN);
			BiomN = MathUtilities.Sum(Soil.SoilNitrogen.MicrobialN);
			AccumFert += Fert.NitrogenApplied;
			AccumIrrigation += Irrig.IrrigationApplied;
			
			
			AccumEO -= Soil.SoilWater.Eo;
			AccumES -= Soil.SoilWater.Es; 
			AccumDrainage -= Soil.SoilWater.Drainage;
			AccumRunoff -= Soil.SoilWater.Runoff;
			SWC = MathUtilities.Sum(Soil.SoilWater.SWmm);
			DUL = MathUtilities.Sum(Soil.SoilWater.DULmm);
		}
	}
}
```
    Report: EventNames=[Clock].DoReport
      VariableNames:
        [Clock].Today as Date
        [MicroClimate].net_radn
        [Weather].Radn as SolarRadiation
        [Chicory].Leaf.RadIntTot as InterceptedRadiation
        [Weather].Rain as Rainfall
        [Irrigation].IrrigationApplied as IrrigationApplied
        [Soil].SoilWater.Eo as Eo
        [Soil].SoilWater.Es as Evaporation
        [Chicory].Leaf.Transpiration as Transpiration
        [Soil].SoilWater.pond as PondedWater
        [Soil].SoilWater.Drainage as Drainage
        [Soil].SoilWater.Runoff as Runoff
        sum([Soil].SoilWater.outflow_lat) as LateralFlow
        sum([Soil].SoilWater.SWmm) as TotalSWC
        sum([Soil].SoilWater.DULmm) as TotalDUL
        sum([Soil].SoilWater.LL15mm) as TotalLL15
        [Fertiliser].NitrogenApplied as FertiliserN
        sum([Soil].SoilNitrogen.Denitrification) as DenitrifiedN
        ([Soil].SoilWater.LeachNH4 + [Soil].SoilWater.LeachNO3) as LeachedN
        (-1*[Chicory].Root.NUptake) as UptakeN
        sum([Soil].SoilNitrogen.MineralisedN) as MineralisedSoilN
        sum([Soil].SoilNitrogen.dlt_n_min_res) as MineralisedSurfOMN
        ([Chicory].Leaf.Detached.N+[Chicory].Stem.Detached.N+[Chicory].Inflorescence.Detached.N) as DetachedAGN
        ([Chicory].Taproot.Detached.N+[Chicory].Root.Detached.N) as DetachedBGN
        (sum([Soil].SoilNitrogen.urea) + sum([Soil].SoilNitrogen.NH4) + sum([Soil].SoilNitrogen.NO3)) as SoilNContent
        sum([Soil].SoilNitrogen.urea) as SoilUrea
        sum([Soil].SoilNitrogen.NH4) as SoilNH4
        sum([Soil].SoilNitrogen.NO3) as SoilNO3
        (sum([Soil].SoilNitrogen.NH4[1:3])+sum([Soil].SoilNitrogen.NO3[1:3])) as TopSoilN
        [SurfaceOrganicMatter].N as TotalSurfOMN
        sum([Soil].SoilNitrogen.FOMN) as TotalFOMN
        sum([Soil].SoilNitrogen.HumicN) as TotalHumicN
        sum([Soil].SoilNitrogen.MicrobialN as TotalMicrobialN
        ([Chicory].Total.N) as TotalPlantN
        [Defoliate].Script.RotationHarvestingDM
        [Defoliate].Script.RotationHarvestedDM as RotationHarvestedWt
        [Defoliate].Script.PreHarvestDM
        [Defoliate].Script.PostHarvestDM
        [Defoliate].Script.DefoliatedDM
        [Defoliate].Script.HarvestedDM
        [Defoliate].Script.RemovedDM
        [Defoliate].Script.DefoliatedN
        [Defoliate].Script.HarvestedN
        [Defoliate].Script.RemovedN
        [Defoliate].Script.NReturnedInDung
        [Defoliate].Script.NReturnedInUrine
        [Defoliate].Script.DefoliatedDM as HarvestedWt
        [Defoliate].Script.DaysAfterCut
        [Chicory].Phenology.ThermalTime.Value()
        [Chicory].Phenology.Photoperiod.Value()
        [Chicory].Phenology.Vernalisation.TodaysVernalisation
        [Chicory].Phenology.Vernalisation.DaysVernalised
        [Chicory].Population
        [Chicory].Phenology.CurrentPhaseName
        [Chicory].Phenology.Stage
        [Chicory].Root.LengthDensity
        [Chicory].Leaf.ExtinctionCoefficientFunction.Value()
        ([Chicory].Leaf.Live.Wt / ([Chicory].AboveGroundLive.Wt + 0.000001)) as Chicory.LeafFraction
        ([Chicory].Stem.Live.Wt / ([Chicory].AboveGroundLive.Wt + 0.000001)) as Chicory.StemFraction
        ([Chicory].Inflorescence.Live.Wt / ([Chicory].AboveGroundLive.Wt + 0.000001)) as FlowerFraction
        ([Chicory].Taproot.Live.Wt / ([Chicory].BelowGround.Wt + 0.000001)) as TaprootFraction
        ([Chicory].Root.Live.Wt / ([Chicory].BelowGround.Wt + 0.000001)) as RootFraction
        [Chicory].Arbitrator.DM.TotalFixationSupply
        [Chicory].Arbitrator.DM.TotalPlantDemand
        [Chicory].Arbitrator.DM.Allocated
        [Chicory].Arbitrator.DM.SinkLimitation
        [Chicory].Arbitrator.DM.NutrientLimitation
        [Chicory].Arbitrator.FDM
        [ExtraVariables].Script.Leaf_DMSupply
        [ExtraVariables].Script.Stem_DMSupply
        [ExtraVariables].Script.Inflorescence_DMSupply
        [ExtraVariables].Script.Root_DMSupply
        [ExtraVariables].Script.Taproot_DMSupply
        [ExtraVariables].Script.Leaf_DMDemand
        [ExtraVariables].Script.Stem_DMDemand
        [ExtraVariables].Script.Inflorescence_DMDemand
        [ExtraVariables].Script.Root_DMDemand
        [ExtraVariables].Script.Taproot_DMDemand
        [Chicory].Arbitrator.N.TotalPlantSupply
        [Chicory].Arbitrator.N.TotalPlantDemand
        [Chicory].Arbitrator.N.Allocated
        [Chicory].Arbitrator.FN
        [Chicory].Arbitrator.WSupply
        [Chicory].Arbitrator.WDemand
        [Chicory].Arbitrator.WAllocated
        [Chicory].Arbitrator.FW
        [Chicory].Root.NSupplyUptake
        [Chicory].Root.NTakenUp
        [Chicory].Root.NSupply.Uptake
        [Chicory].Root.NUptake
        [ExtraVariables].Script.LeafN_Supply
        [ExtraVariables].Script.Stem_NSupply
        [ExtraVariables].Script.Inflorescence_NSupply
        [ExtraVariables].Script.Root_NSupply
        [ExtraVariables].Script.Taproot_NSupply
        [ExtraVariables].Script.Leaf_NDemand
        [ExtraVariables].Script.Stem_NDemand
        [ExtraVariables].Script.Inflorescence_NDemand
        [ExtraVariables].Script.Root_NDemand
        [ExtraVariables].Script.Taproot_NDemand
        [Chicory].ShootRootRatio.Value()
        [Chicory].TargetShootRootRatio.Value()
        [Chicory].AdjustedShootRootRatio.Value()
        [Chicory].Leaf.DMDemandFunction.PartitionFraction.Value()
        [Chicory].Stem.DMDemandFunction.PartitionFraction.Value()
        [Chicory].Inflorescence.DMDemandFunction.PartitionFraction.Value()
        [Chicory].Taproot.DMDemandFunction.PartitionFraction.Value()
        [Chicory].Root.PartitionFraction.Value()
        [Chicory].StemsLeafRatio.Value()
        [Chicory].FlowerStemRatio.Value()
        [Chicory].TaprootRootRatio.Value()
        [Chicory].TargetStemsLeafRatio.Value()
        [Chicory].TargetFlowerStemRatio.Value()
        [Chicory].TargetTaprootRootRatio.Value()
        [Chicory].Total.Wt
        [Chicory].Total.N
        [Chicory].Total.NConc
        [Chicory].AboveGround.Wt
        [Chicory].BelowGround.Wt
        [Chicory].AboveGround.N
        [Chicory].BelowGround.N
        [Chicory].AboveGround.NConc
        [Chicory].BelowGround.NConc
        [Chicory].AboveGroundLive.NConc
        [Chicory].BelowGroundLive.NConc
        [Chicory].Leaf.Wt
        [Chicory].Leaf.Live.Wt
        [Chicory].Leaf.Live.N
        [Chicory].Leaf.Live.NConc
        [Chicory].Leaf.Dead.Wt
        [Chicory].Leaf.Dead.NConc
        [Chicory].Leaf.CoverTotal
        [Chicory].Leaf.CoverGreen
        [Chicory].Leaf.CoverDead
        [Chicory].Leaf.LAITotal
        [Chicory].Leaf.LAI
        [Chicory].Leaf.LAIDead
        [Chicory].Leaf.Height
        [Chicory].Leaf.PotentialBiomass.Value()
        [Chicory].Leaf.Transpiration
        [Chicory].Leaf.Fw
        [Chicory].Leaf.Fn
        [Chicory].Leaf.Photosynthesis.FCO2
        [Chicory].Leaf.Photosynthesis.FN
        [Chicory].Leaf.Photosynthesis.FT
        [Chicory].Leaf.Photosynthesis.FW
        [Chicory].Leaf.Photosynthesis.FVPD
        [Chicory].Leaf.FRGR
        [Chicory].Stem.Live.Wt
        [Chicory].Stem.Live.N
        [Chicory].Stem.Live.NConc
        [Chicory].Stem.Dead.Wt
        [Chicory].Stem.Dead.NConc
        [Chicory].Inflorescence.Live.Wt
        [Chicory].Inflorescence.Live.N
        [Chicory].Inflorescence.Live.NConc
        [Chicory].Inflorescence.Dead.Wt
        [Chicory].Inflorescence.Dead.NConc
        [Chicory].Taproot.Live.Wt
        [Chicory].Taproot.Live.N
        [Chicory].Taproot.Live.NConc
        [Chicory].Taproot.Dead.Wt
        [Chicory].Taproot.Dead.NConc
        [Chicory].Root.Live.Wt
        [Chicory].Root.Live.N
        [Chicory].Root.Live.NConc
        [Chicory].Root.Dead.Wt
        [Chicory].Root.Dead.NConc
        [Chicory].Root.Depth
        [Chicory].Root.WaterDemand
        [Chicory].Root.WaterUptake
        [Chicory].Leaf.Live.StructuralWt
        [Chicory].Leaf.Live.NonStructuralWt
        [Chicory].Leaf.Live.MetabolicWt
        [Chicory].Leaf.Live.StructuralN
        [Chicory].Leaf.Live.NonStructuralN
        [Chicory].Leaf.Live.MetabolicN
        [Chicory].Leaf.Dead.StructuralWt
        [Chicory].Leaf.Dead.NonStructuralWt
        [Chicory].Leaf.Dead.MetabolicWt
        [Chicory].Leaf.Dead.StructuralN
        [Chicory].Leaf.Dead.NonStructuralN
        [Chicory].Leaf.Dead.MetabolicN
        [Chicory].Stem.Live.StructuralWt
        [Chicory].Stem.Live.NonStructuralWt
        [Chicory].Stem.Live.MetabolicWt
        [Chicory].Stem.Live.StructuralN
        [Chicory].Stem.Live.NonStructuralN
        [Chicory].Inflorescence.Live.StructuralWt
        [Chicory].Inflorescence.Live.NonStructuralWt
        [Chicory].Inflorescence.Live.StructuralN
        [Chicory].Inflorescence.Live.NonStructuralN
        [Chicory].Root.Live.StructuralWt
        [Chicory].Root.Live.NonStructuralWt
        [Chicory].Root.Live.StructuralN
        [Chicory].Root.Live.NonStructuralN
        [Chicory].Taproot.Live.StructuralWt
        [Chicory].Taproot.Live.NonStructuralWt
        [Chicory].Taproot.Live.StructuralN
        [Chicory].Taproot.Live.NonStructuralN
        [Chicory].Leaf.Live.StructuralNConc
        [Chicory].Leaf.Live.NonStructuralNConc
        [Chicory].Root.Live.StructuralNConc
        [Chicory].Root.Live.NonStructuralNConc
        [Chicory].Leaf.DMDemandFunction.PartitionFraction.Value()
        [Chicory].Stem.DMDemandFunction.PartitionFraction.Value()
        [Chicory].Inflorescence.DMDemandFunction.PartitionFraction.Value()
        [Chicory].Root.PartitionFraction.Value()
        [Chicory].Taproot.DMDemandFunction.PartitionFraction.Value()
        [Chicory].Leaf.Allocated.Wt
        [Chicory].Stem.Allocated.Wt
        [Chicory].Inflorescence.Allocated.Wt
        [Chicory].Taproot.Allocated.Wt
        [Chicory].Root.Allocated.Wt
        [Chicory].Leaf.Senesced.Wt
        [Chicory].Stem.Senesced.Wt
        [Chicory].Inflorescence.Senesced.Wt
        [Chicory].Taproot.Senesced.Wt
        [Chicory].Root.Senesced.Wt
        [Chicory].Leaf.Detached.Wt
        [Chicory].Stem.Detached.Wt
        [Chicory].Inflorescence.Detached.Wt
        [Chicory].Taproot.Detached.Wt
        [Chicory].Root.Detached.Wt
        [Chicory].Leaf.Removed.Wt
        [Chicory].Stem.Removed.Wt
        [Chicory].Inflorescence.Removed.Wt
        [Chicory].Taproot.Removed.Wt
        [Chicory].Root.Removed.Wt
  DataStore
    ExcelInput Observed: FileName=Observed.xlsx; SheetNames=[Observed]
    PredictedObserved: PredictedTableName=Report; ObservedTableName=Observed; FieldNameUsedForMatch=Date
      Tests: POName=PredictedObserved
        AcceptedStats:
          Name                           n     Slope     Intercept  SEslope    SEintercept  R2         RMSE       NSE        ME           MAE        RSR
          Chicory.AboveGround.Wt         1550  0.752671  52.2373    0.0187766  3.15251      0.509327   77.9997    0.357317   18.3954      56.5723    0.801416
          Chicory.AboveGroundLive.NConc  884   0.263579  0.0192176  0.0397367  0.0014239    0.0475149  0.0125998  -1.65102   -0.00654818  0.0104207  1.62727
          Chicory.Leaf.LAI               72    0.220706  2.44362    0.018818   0.130638     0.662742   4.25571    0.313815   -1.19492     2.46358    0.82259
          Chicory.LeafFraction           143   0.788947  0.201343   0.0544754  0.0504664    0.598      0.080524   0.533075   0.00741035   0.0419651  0.680926
          Chicory.Population             252   0.532909  88.3527    0.0355855  3.96326      0.472867   56.2209    -0.217167  42.0965      46.4832    1.10106
          Chicory.StemFraction           200   0.764506  0.0591762  0.0821219  0.0118455    0.304446   0.135011   -0.505141  0.0372165    0.0858406  1.22377
          HarvestedWt                    962   0.756248  56.6717    0.0251234  3.96039      0.485555   77.277     0.256448   25.0607      58.0283    0.861846
          RotationHarvestedWt            1117  0.741933  68.545     0.0228856  3.90306      0.485227   85.0027    0.238673   32.4198      64.122     0.87215
        AcceptedStatsName=Name n Slope Intercept SEslope SEintercept R2 RMSE NSE ME MAE RSR
  Folder Validation
    Memo Note
      The performance of the chicory mode is evaluated in simulations based on experiments conducted primarily in New Zealand.  Datasets from USA have been added, but they should be taken with caution as there was limited information about the experiments and published results corresponded to annual or seasonal aggregates only.  Values for population are included, but they were not explicitly simulated by the model; only a decrease in plant numbers as function of cuts or grazings is considered.  There is indication in the literature that severe defoliation may lead to higher death rate for chicory, but when the data from several publications are analysed together, no relationship could be found.  All experiments show a decline in plant population over time.  It is likely that the timing of defoliation (soon before winter) and the severity of trampling (depending animal type and numbers as well as soil conditions) are better indicators of plant mortality, but detailed information about this is lacking.
      The evaluation of the model with regards to plant N concentration is only superficial and should not be seen as a test currently.  This is due to, on one hand, the amount and quality of data for N content being restricted, with uncertainties regarding whether they refer to whole plant or only fresh leaves.   On the other hand, and more importatly, some of the underlying code don't seem to be able to describe some processes under plant cut/grazing and re-growth conditions.  The PMF processes for computing N demand and supply (especially regarding remobilisation within living tissues) are still being developed.  One issue in particular is caused because the model attempts to keep all the plant tissues at maximum N concentration, which can lead to high N demands when the plant is in deficit, restricting growth beyond expectations. This may also reduces mobilisation of N (as well as DM) from storage organs (taproot in chicory) towards new growth.  Due to these issues, N concentration in the various organs is currently poorly predicted.  The model will be upgraded in the near future as the work on the code to improve the description of those specific processes is ongoing.
    Folder New Zealand
      Folder ScottFarm
        Experiment ScottFarmC
          Memo
            Simulation based on unpublished data from a field trial, part of SuperP farmlet, run at Scott farm, Hamilton, New Zealand, from 2008 to 2010.  Trial plots were sown with chicory only, cultivar '*Choice*'; seeds drilled (6 kg/ha) and broadcasted (2 kg/ha).  Sward was grazed by dairy cows.  Measurements taken comprise plant density (quadrat method) and yield (estimated assuming a fixed 5 cm residue).
            Data supplied by Julia Lee, DairyNZ.
          Factors
            Factor 17a: Specifications=[Clock].StartDate = 2008-07-01
          Simulation ScottFarmC17a
            Clock: StartDate=2008-09-01; EndDate=2010-05-30
            Weather: FileName=Ruakura.met
            Summary
            SoilArbitrator Soil Arbitrator
            Zone Field: Area=1; Slope=0
              Folder Management
                Operations Sowing
                  2008-10-23  [Chicory].Sow(population: 200, cultivar: "Choice", depth: 10, rowSpacing: 150)
                  2008-10-23  [Fertiliser].Apply(Amount: 60, Type: Fertiliser.Types.UreaN, Depth: 10)
                Operations DefoliationSchedule
                  2009-01-19  [Defoliate].Script.Defoliate(defoliationType: "Graze", amountDM: 50, amountType: "ResidualDM", duration: 1)
                  2009-02-23  [Defoliate].Script.Defoliate(defoliationType: "Graze", amountDM: 50, amountType: "ResidualDM", duration: 1)
                  2009-04-01  [Defoliate].Script.Defoliate(defoliationType: "Graze", amountDM: 50, amountType: "ResidualDM", duration: 1)
                  2009-05-08  [Defoliate].Script.Defoliate(defoliationType: "Graze", amountDM: 50, amountType: "ResidualDM", duration: 1)
                  2009-09-14  [Defoliate].Script.Defoliate(defoliationType: "Graze", amountDM: 50, amountType: "ResidualDM", duration: 1)
                  2009-10-22  [Defoliate].Script.Defoliate(defoliationType: "Graze", amountDM: 50, amountType: "ResidualDM", duration: 1)
                  2009-11-25  [Defoliate].Script.Defoliate(defoliationType: "Graze", amountDM: 50, amountType: "ResidualDM", duration: 1)
                  2009-12-21  [Defoliate].Script.Defoliate(defoliationType: "Graze", amountDM: 50, amountType: "ResidualDM", duration: 1)
                  2010-01-15  [Defoliate].Script.Defoliate(defoliationType: "Graze", amountDM: 50, amountType: "ResidualDM", duration: 1)
                  2010-02-12  [Defoliate].Script.Defoliate(defoliationType: "Graze", amountDM: 50, amountType: "ResidualDM", duration: 1)
                  2010-03-22  [Defoliate].Script.Defoliate(defoliationType: "Graze", amountDM: 50, amountType: "ResidualDM", duration: 1)
                Operations ExcretaSchedule
                  2009-01-19  [SurfaceOrganicMatter].Add(mass: 67.0, N: 12.0, P: 0.0, type: "RuminantDung_PastureFed", name "dung")
                  2009-01-19  [Fertiliser].Apply(Amount: 18.0, Type: Fertiliser.Types.UreaN, Depth: 30)
                  2009-02-23  [SurfaceOrganicMatter].Add(mass: 67.0, N: 12.0, P: 0.0, type: "RuminantDung_PastureFed", name "dung")
                  2009-02-23  [Fertiliser].Apply(Amount: 18.0, Type: Fertiliser.Types.UreaN, Depth: 30)
                  2009-04-01  [SurfaceOrganicMatter].Add(mass: 67.0, N: 12.0, P: 0.0, type: "RuminantDung_PastureFed", name "dung")
                  2009-04-01  [Fertiliser].Apply(Amount: 18.0, Type: Fertiliser.Types.UreaN, Depth: 30)
                  2009-05-08  [SurfaceOrganicMatter].Add(mass: 67.0, N: 12.0, P: 0.0, type: "RuminantDung_PastureFed", name "dung")
                  2009-05-08  [Fertiliser].Apply(Amount: 18.0, Type: Fertiliser.Types.UreaN, Depth: 30)
                  2009-09-14  [SurfaceOrganicMatter].Add(mass: 67.0, N: 12.0, P: 0.0, type: "RuminantDung_PastureFed", name "dung")
                  2009-09-14  [Fertiliser].Apply(Amount: 18.0, Type: Fertiliser.Types.UreaN, Depth: 30)
                  2009-10-22  [SurfaceOrganicMatter].Add(mass: 67.0, N: 12.0, P: 0.0, type: "RuminantDung_PastureFed", name "dung")
                  2009-10-22  [Fertiliser].Apply(Amount: 18.0, Type: Fertiliser.Types.UreaN, Depth: 30)
                  2009-11-25  [SurfaceOrganicMatter].Add(mass: 67.0, N: 12.0, P: 0.0, type: "RuminantDung_PastureFed", name "dung")
                  2009-11-25  [Fertiliser].Apply(Amount: 18.0, Type: Fertiliser.Types.UreaN, Depth: 30)
                  2009-12-21  [SurfaceOrganicMatter].Add(mass: 32.2, N: 5.8, P: 0.0, type: "RuminantDung_PastureFed", name "dung")
                  2009-12-21  [Fertiliser].Apply(Amount: 8.6, Type: Fertiliser.Types.UreaN, Depth: 30)
                  2010-01-15  [SurfaceOrganicMatter].Add(mass: 32.2, N: 5.8, P: 0.0, type: "RuminantDung_PastureFed", name "dung")
                  2010-01-15  [Fertiliser].Apply(Amount: 8.6, Type: Fertiliser.Types.UreaN, Depth: 30)
                  2010-02-12  [SurfaceOrganicMatter].Add(mass: 32.2, N: 5.8, P: 0.0, type: "RuminantDung_PastureFed", name "dung")
                  2010-02-12  [Fertiliser].Apply(Amount: 8.6, Type: Fertiliser.Types.UreaN, Depth: 30)
                  2010-03-22  [SurfaceOrganicMatter].Add(mass: 32.2, N: 5.8, P: 0.0, type: "RuminantDung_PastureFed", name "dung")
                  2010-03-22  [Fertiliser].Apply(Amount: 8.6, Type: Fertiliser.Types.UreaN, Depth: 30)
                Manager Defoliate
                  Message =
```csharp
using System;
using Models.Core;
using System.Collections.Generic;
using System.Text;
using Models;
using Models.Soils;
using Models.PMF;
using System.Xml.Serialization;
using APSIM.Shared.Utilities;

namespace Models
{
	[Serializable]
	public class Script : Model
	{
		[Description("This script is set in 'Replacements':")]
		public string Message { get; set; }
	}
}
```
                Manager AutomaticIrrigation
                  allowIrrigation = yes
                  seasonStart = 15-Sep
                  seasonEnd = 30-Jul
                  seasonsAllocation = 10000
                  triggerDeficit = 75
                  targetDeficit = 90
                  returndays = 3
                  maximumAmount = 15
                  depthPAWC = 300
```csharp
using System;
using Models.Core;
using Models.PMF;
using Models.Soils;
using System.Xml.Serialization;
using Models.PMF;
using APSIM.Shared.Utilities;

        
namespace Models
{
	[Serializable] 
	[System.Xml.Serialization.XmlInclude(typeof(Model))]
	public class Script : Model
	{
		//Communication to other modules
		[Link] ISummary summary = null;
		[Link] Irrigation Irrigation;
		[Link] Clock Clock;
		[Link] Soil Soil;
		[Link(IsOptional = true)] Plant existingCrop;
	   
		//User inputs from properties tab
		[Description("Turn irrigation on?")]
		public answerType allowIrrigation { get; set; }
		[Description("Start of irrigation season (dd-MMM)")]
		public string seasonStart { get; set; }
		[Description("End of irrigation season (dd-MMM)")]
		public string seasonEnd { get; set; }
		[Description("Season allocation (mm)")]
		public double seasonsAllocation { get; set; }
		[Description("Deficit to trigger irrigation (% PAWC)")]
		public double triggerDeficit { get; set; }
		[Description("Deficit to stop irrigaton (% PAWC)")]
		public double targetDeficit { get; set; }
		[Description("Minimum days for irrigation to return")]
		public double returndays { get; set; }
		[Description("Maximum irrigation application (mm/day)")]
		public double maximumAmount { get; set; }
		[Description("Depth to calculate PAWC (mm)")]
		public double depthPAWC { get; set; }
	   
		public enum answerType
		{
			/// <summary>a positive answer</summary>
			yes,
			/// <summary>a negative answer</summary>
			no
		}

		//Class members
		[XmlIgnore] public double TopSWdeficit { get; set; }
		[XmlIgnore] public double TopSWC { get; set; }
		[XmlIgnore] public double DaysSinceIrrigation { get; set; }
		[XmlIgnore] public double AmountToApply { get; set; }
		[XmlIgnore] public double SeasonAppliedAmount { get; set; }
		
		private bool IrrigationIsAllowed { get; set; }
		private bool SeasonIsOpen { get; set; }
		private bool CropIsActive { get; set; }
		private bool IrrigatorIsAvailable { get; set; }
		private bool SoilIsDry { get; set; }

		private DateTime StartDate;
		private DateTime EndDate;
		private double TopDUL;
		private double TopLL;
		private int nLayers;
	
		//Calculate static soil variables
		[EventSubscribe("StartOfSimulation")]
		private void OnStartOfSimulation(object sender, EventArgs e)
		{   
			//Set the season dates
			StartDate = DateTime.Parse(seasonStart + "-" + Clock.Today.Year.ToString());
			EndDate = DateTime.Parse(seasonEnd + "-" + Clock.Today.Year.ToString());
			
			//Can we irrigate at all?
			IrrigationIsAllowed = false; 
			if (allowIrrigation == answerType.yes)
				IrrigationIsAllowed = true; 

			//Calculate soil water variables
			double depthFromSurface = 0.0;
			double fracLayer = 0.0;
			nLayers = Soil.SoilWater.Thickness.Length;
			for (int layer = 0; layer < nLayers; layer++)
			{
				fracLayer = Math.Min(1.0, (depthPAWC - depthFromSurface) / Soil.SoilWater.Thickness[layer]);
				TopLL += Soil.SoilWater.LL15mm[layer] * fracLayer;
				TopDUL += Soil.SoilWater.DULmm[layer] * fracLayer;
				depthFromSurface += Soil.SoilWater.Thickness[layer];
				if (depthFromSurface >= depthPAWC)
					layer = nLayers;
			}
		}
	   	  
		//Determine daily requirement for irrigation
		[EventSubscribe("StartOfDay")]
		private void OnStartOfDay(object sender, EventArgs e)
		{
			//Can we irrigate today?		  
			SeasonIsOpen = isBetween(Clock.Today, StartDate, EndDate);

			//Is there a crop in the ground that needs irrigation?
			CropIsActive = false;
			if ((existingCrop != null) && (existingCrop.IsAlive))
				CropIsActive = true;
			//if ((existingCrop.Phenology.Stage >= 3.0) && (existingCrop.Phenology.Stage < 6.0))
	      
			//Is the irrigator available?
			IrrigatorIsAvailable = false;
			DaysSinceIrrigation += 1;
			if (DaysSinceIrrigation >= returndays)
				IrrigatorIsAvailable = true;
	      
			//Is the soil dry enough to require irrigation?
			SoilIsDry = false;
			double depthFromSurface = 0.0;
			double fracLayer = 0.0;
			TopSWC = 0.0;
			for (int layer = 0; layer < nLayers; layer++)
			{
				fracLayer = Math.Min(1.0, (depthPAWC - depthFromSurface) / Soil.SoilWater.Thickness[layer]);
				TopSWC += Soil.SoilWater.SWmm[layer] * fracLayer;
				depthFromSurface += Soil.SoilWater.Thickness[layer];
				if (depthFromSurface >= depthPAWC)
					layer = nLayers;
			}
			
			TopSWdeficit = TopSWC - TopDUL;
			if (Math.Max(0.0, -TopSWdeficit) >= (TopDUL - TopLL) * (100 - triggerDeficit) / 100)
				SoilIsDry = true;
	            
			//Are all the conditions ratifying irrigation
			if (IrrigationIsAllowed && SeasonIsOpen && CropIsActive && IrrigatorIsAvailable && SoilIsDry)
			{
				//Lets bloody well irrigate then!!!!
				AmountToApply = TopDUL * targetDeficit / 100 - TopSWC;
				//AmountToApply = Math.Max(0.0, Math.Min(AmountToApply, seasonsAllocation - SeasonAppliedAmount));
				AmountToApply = maximumAmount;
				Irrigation.Apply(AmountToApply);
				DaysSinceIrrigation = 0;
				SeasonAppliedAmount += AmountToApply;
			}
		}
		
		///Checks whether theDate is between iniDate and endDate (non-year specific)
		private bool isBetween(DateTime theDay, DateTime iniDate, DateTime endDate)
		{
			bool result = false;
			if (iniDate.DayOfYear < endDate.DayOfYear)
			{
				// period is within one year, ex: summer in the northern hemisphere
				if ((theDay.DayOfYear >= iniDate.DayOfYear) && (theDay.DayOfYear <= endDate.DayOfYear))
					result = true;
			}
			else
			{
				// period goes over the end of the year, ex: summer in the southern hemisphere
				if ((theDay.DayOfYear >= iniDate.DayOfYear) || (theDay.DayOfYear <= endDate.DayOfYear))
					result = true;
			}
			
			return result;
		}
	}
}
```
                Manager ExtraVariables
```csharp
// This will be replaced by the "ExtraVariables" section in "Replacements"

using System;
using Models.Core;

namespace Models
{
	[Serializable] 
	public class Script : Model
	{
	}
}
```
              MicroClimate: a_interception=0; b_interception=1; c_interception=0; d_interception=0; soil_albedo=0.23; sun_angle=15; soil_heat_flux_fraction=0.4; night_interception_fraction=0.5; refheight=2; albedo=0.26; emissivity=0.96; RadIntTotal=0
              Irrigation
              Fertiliser
              SurfaceOrganicMatter surface organic matter: PondActive=no; ReportAdditions=no; ReportRemovals=no; PoolName=grass; type=grass; mass=500; standing_fraction=0; cnr=40; CriticalResidueWeight=2000; OptimumDecompTemp=20; MaxCumulativeEOS=20; CNRatioDecompCoeff=0.277; CNRatioDecompThreshold=25; TotalLeachRain=25; MinRainToLeach=10; CriticalMinimumOrganicC=0.004; DefaultCPRatio=0; DefaultStandingFraction=0; StandingExtinctCoeff=0.5; FractionFaecesAdded=0.5
                Pools:
                  {PoolName=grass, ResidueType=grass, Mass=500, CNRatio=40, StandingFraction=0}
                ResidueTypes: LoadFromResource=ResidueTypes
                TillageTypes TillageTypesList
              Soil HorotiuSoil: SoilType=Typic Udivitrand (US), Typic Orthic Allophanic Soil (NZ); LocalName=Horotiu silt loam; Site=Ruakura; NearestTown=Hamilton; Region=Waikato; Country=New Zealand; Latitude=0; Longitude=0; DataSource=Based primarily on data from Close et al, 2003
                Analysis: PHUnits=Water; BoronUnits=HotWater
                  Thickness  Rocks  PH  CEC   ParticleSizeSand  ParticleSizeSilt  ParticleSizeClay
                  200        0      6   23.1  47                33                20
                  200        0      6   17.2  65                17                19
                  130        2      6   12.4  76                13                11
                  140        5      6   10    84                10                7
                  380        5      6   7.2   88                8                 5
                  230        19     6   3.1   91                6                 3
                  220        33     6   1.6   94                5                 1
                Water
                  Thickness  BD    AirDry  LL15   DUL    SAT    KS
                  200        0.88  0.114   0.228  0.373  0.581  553
                  200        0.85  0.209   0.22   0.34   0.609  5083
                  130        1.03  0.182   0.182  0.323  0.54   8353
                  140        1.11  0.15    0.15   0.282  0.5    13589
                  380        1.11  0.142   0.142  0.2    0.5    38963
                  230        1.03  0.103   0.103  0.16   0.446  45280
                  220        1.03  0.084   0.084  0.13   0.37   53606
                  SoilCrop ChicorySoil: LL=[0.23, 0.22, 0.18, 0.15, 0.14, 0.1, 0.08]; KL=[0.1, 0.08, 0.05, 0.02, 0.01, 0.01, 0]; XF=[1, 1, 1, 1, 1, 1, 0.5]
                SoilWater: SummerDate=21-Sep; SummerU=6; SummerCona=3.5; WinterDate=23-Mar; WinterU=6; WinterCona=2.5; DiffusConst=88; DiffusSlope=35; Salb=0.2; CN2Bare=0.7; CNRed=20; CNCov=0.8; max_pond=0; Thickness=[200, 200, 130, 140, 380, 230, 220]; SWCON=[0.55, 0.6, 0.7, 0.7, 0.75, 0.8, 0.8]; residueinterception=0
                SoilNitrogen: fom_type=[default, manure, mucuna, lablab, shemp, stable]; fract_carb=[0.2, 0.3, 0.54, 0.57, 0.45, 0]; fract_cell=[0.7, 0.3, 0.37, 0.37, 0.47, 0.1]; fract_lign=[0.1, 0.4, 0.09, 0.06, 0.08, 0.9]; wfpsN2N2O_x=[22, 88]; wfpsN2N2O_y=[0.1, 1]
                SoilOrganicMatter: RootCN=40; RootWt=1000; SoilCN=12.5; EnrACoeff=7.4; EnrBCoeff=0.2; OCUnits=Total
                  Thickness  OC    FBiom  FInert
                  200        8     0.08   0.57
                  200        1.88  0.04   0.6
                  130        0.93  0.02   0.62
                  140        0.43  0.01   0.65
                  380        0.13  0.01   0.7
                  230        0.1   0.01   0.8
                  220        0.07  0.01   0.85
                InitialWater Initial water: PercentMethod=EvenlyDistributed; FractionFull=0.9
                Sample Initial nitrogen: NO3Units=kgha; NH4Units=kgha; SWUnits=Volumetric; OCUnits=Total; PHUnits=Water
                  Thickness  NO3   NH4
                  200        26.4  0.9
                  200        17    0.3
                  600        32.8  0.6
                  500        5.2   0.5
                CERESSoilTemperature
              Plant Chicory: CropType=Chicory
              Report: EventNames=[Clock].DoReport
              SoluteManager
        Experiment ScottFarmE
          Memo
            Simulation based on unpublished data from a chicory establishment trial at Scott farm, Hamilton, New Zealand, run from 2009 to 2010.  Trial plots were sown with chicory, cultivar '*Choice*'; direct drilled after spraying existing pasture with herbicide.  Sward was mechanically mowned.  Measurements comprised of yield (plate meter technique) and population (quadrat method).
            Data supplied by Julia Lee, DairyNZ.
          Factors
            Factor stablishment: Specifications=[Clock].StartDate = 2009-11-01
          Simulation ScottFarmEstablishment
            Memo
              Simulation based on unpublished data from a chicory establishment trial at Scott farm, Hamilton, New Zealand, run from 2009 to 2010.  Trial plots were sown with chicory, cultivar Choice; direct drilled after spraying existing pasture with herbicide.  Sward was mechanically mowned.  Measurements comprised of yield (plate meter technique) and population (quadrat method).
              Data supplied by Julia Lee, DairyNZ.
            Clock: StartDate=2009-11-01; EndDate=2010-06-30
            Weather: FileName=Ruakura.met
            Summary
            SoilArbitrator Soil Arbitrator
            Zone Field: Area=1; Slope=0
              Folder Management
                Operations Sowing
                  2009-11-14  [Chicory].Sow(population: 120, cultivar: "Choice", depth: 10, rowSpacing: 150)
                  2009-11-14  [Fertiliser].Apply(Amount: 40, Type: Fertiliser.Types.UreaN, Depth: 10)
                Operations DefoliationSchedule
                  2010-01-07  [Defoliate].Script.Defoliate(defoliationType: "Cut", amountDM: 50, amountType: "ResidualDM", duration: 1)
                  2010-01-27  [Defoliate].Script.Defoliate(defoliationType: "Cut", amountDM: 50, amountType: "ResidualDM", duration: 1)
                  2010-02-17  [Defoliate].Script.Defoliate(defoliationType: "Cut", amountDM: 50, amountType: "ResidualDM", duration: 1)
                  2010-03-19  [Defoliate].Script.Defoliate(defoliationType: "Cut", amountDM: 50, amountType: "ResidualDM", duration: 1)
                  2010-06-03  [Defoliate].Script.Defoliate(defoliationType: "Cut", amountDM: 50, amountType: "ResidualDM", duration: 1)
                Manager Defoliate: same as Validation.New Zealand.ScottFarm.ScottFarmC.ScottFarmC17a.Field.Management.Defoliate
                Manager AutomaticIrrigation
                  allowIrrigation = yes
                  seasonStart = 01-Oct
                  seasonEnd = 30-Jul
                  seasonsAllocation = 10000
                  triggerDeficit = 75
                  targetDeficit = 90
                  returndays = 3
                  maximumAmount = 15
                  depthPAWC = 300
                  script: same as in Validation.New Zealand.ScottFarm.ScottFarmC.ScottFarmC17a.Field.Management.AutomaticIrrigation
                Manager ExtraVariables
                  script: same as in Validation.New Zealand.ScottFarm.ScottFarmC.ScottFarmC17a.Field.Management.ExtraVariables
              MicroClimate: a_interception=0; b_interception=1; c_interception=0; d_interception=0; soil_albedo=0.23; sun_angle=15; soil_heat_flux_fraction=0.4; night_interception_fraction=0.5; refheight=2; albedo=0.26; emissivity=0.96; RadIntTotal=0
              Irrigation
              Fertiliser
              SurfaceOrganicMatter surface organic matter: same as Validation.New Zealand.ScottFarm.ScottFarmC.ScottFarmC17a.Field.surface organic matter
              Soil HorotiuSoil: SoilType=Typic Udivitrand (US), Typic Orthic Allophanic Soil (NZ); LocalName=Horotiu silt loam; Site=Ruakura; NearestTown=Hamilton; Region=Waikato; Country=New Zealand; Latitude=0; Longitude=0; DataSource=Based primarily on data from Close et al, 2003
                Analysis: same as Validation.New Zealand.ScottFarm.ScottFarmC.ScottFarmC17a.Field.HorotiuSoil.Analysis
                Water: same as Validation.New Zealand.ScottFarm.ScottFarmC.ScottFarmC17a.Field.HorotiuSoil.Water
                SoilWater: same as Validation.New Zealand.ScottFarm.ScottFarmC.ScottFarmC17a.Field.HorotiuSoil.SoilWater
                SoilNitrogen: fom_type=[default, manure, mucuna, lablab, shemp, stable]; fract_carb=[0.2, 0.3, 0.54, 0.57, 0.45, 0]; fract_cell=[0.7, 0.3, 0.37, 0.37, 0.47, 0.1]; fract_lign=[0.1, 0.4, 0.09, 0.06, 0.08, 0.9]; wfpsN2N2O_x=[22, 88]; wfpsN2N2O_y=[0.1, 1]
                SoilOrganicMatter: same as Validation.New Zealand.ScottFarm.ScottFarmC.ScottFarmC17a.Field.HorotiuSoil.SoilOrganicMatter
                InitialWater Initial water: PercentMethod=EvenlyDistributed; FractionFull=0.9
                Sample Initial nitrogen: NO3Units=kgha; NH4Units=kgha; SWUnits=Volumetric; OCUnits=Total; PHUnits=Water
                  Thickness  NO3    NH4
                  200        26.4   0.88
                  200        17     0.34
                  600        32.78  0.609708
                  500        5.19   0.48267
                CERESSoilTemperature
              Plant Chicory: CropType=Chicory
              Report: EventNames=[Clock].DoReport
              SoluteManager
        Experiment ScottFarmD
          Memo
            Simulation based on a field trial, part of ESP farmlet, run at Scott farm, Hamilton, New Zealand, from 2010 to 2011.  Trial plots were sown with chicory, cultivar '*Choice*'; seeds drilled (6 kg/ha) and broadcasted (2 kg/ha).  Measurements taken comprised plant density (quadrat method) and yield (raising plate techinique).  Sward was grazed by dairy cows.  The trial was similar to that of C17a, but is noted that yields here were much lower due to the dry period after sowing which reduced plant establishment and hence density.
            Data supplied by Julia Lee, DairyNZ.
          Factors
            Factor 9a: Specifications=[Clock].StartDate = 2010-10-01
          Simulation ScottFarmD9a
            Clock: StartDate=2010-10-01; EndDate=2011-04-30
            Weather: FileName=Ruakura.met
            Summary
            SoilArbitrator Soil Arbitrator
            Zone Field: Area=1; Slope=0
              Folder Management
                Operations Sowing
                  2010-10-30  [Chicory].Sow(population: 75, cultivar: "Choice", depth: 10, rowSpacing: 150)
                Operations DefoliationSchedule
                  2011-01-18  [Defoliate].Script.Defoliate(defoliationType: "Graze", amountDM: 50, amountType: "ResidualDM", duration: 3)
                  2011-03-02  [Defoliate].Script.Defoliate(defoliationType: "Graze", amountDM: 50, amountType: "ResidualDM", duration: 3)
                  2011-04-01  [Defoliate].Script.Defoliate(defoliationType: "Graze", amountDM: 50, amountType: "ResidualDM", duration: 3)
                Operations ExcretaSchedule
                  2011-01-18  [SurfaceOrganicMatter].Add(mass: 84.6, N: 15.1, P: 0.0, type: "RuminantDung_PastureFed", name "dung")
                  2011-01-18  [Fertiliser].Apply(Amount: 22.7, Type: Fertiliser.Types.UreaN, Depth: 30)
                  2011-03-02  [SurfaceOrganicMatter].Add(mass: 84.6, N: 15.1, P: 0.0, type: "RuminantDung_PastureFed", name "dung")
                  2011-03-02  [Fertiliser].Apply(Amount: 22.7, Type: Fertiliser.Types.UreaN, Depth: 30)
                  2011-04-01  [SurfaceOrganicMatter].Add(mass: 84.6, N: 15.1, P: 0.0, type: "RuminantDung_PastureFed", name "dung")
                  2011-04-01  [Fertiliser].Apply(Amount: 22.7, Type: Fertiliser.Types.UreaN, Depth: 30)
                Manager Defoliate: same as Validation.New Zealand.ScottFarm.ScottFarmC.ScottFarmC17a.Field.Management.Defoliate
                Manager AutomaticIrrigation: same as Validation.New Zealand.ScottFarm.ScottFarmE.ScottFarmEstablishment.Field.Management.AutomaticIrrigation
                Manager ExtraVariables
                  script: same as in Validation.New Zealand.ScottFarm.ScottFarmC.ScottFarmC17a.Field.Management.ExtraVariables
              MicroClimate: a_interception=0; b_interception=1; c_interception=0; d_interception=0; soil_albedo=0.23; sun_angle=15; soil_heat_flux_fraction=0.4; night_interception_fraction=0.5; refheight=2; albedo=0.26; emissivity=0.96; RadIntTotal=0
              Irrigation
              Fertiliser
              SurfaceOrganicMatter surface organic matter: same as Validation.New Zealand.ScottFarm.ScottFarmC.ScottFarmC17a.Field.surface organic matter
              Soil HorotiuSoil: SoilType=Typic Udivitrand (US), Typic Orthic Allophanic Soil (NZ); LocalName=Horotiu silt loam; Site=Ruakura; NearestTown=Hamilton; Region=Waikato; Country=New Zealand; Latitude=0; Longitude=0; DataSource=Based primarily on data from Close et al, 2003
                Analysis: same as Validation.New Zealand.ScottFarm.ScottFarmC.ScottFarmC17a.Field.HorotiuSoil.Analysis
                Water: same as Validation.New Zealand.ScottFarm.ScottFarmC.ScottFarmC17a.Field.HorotiuSoil.Water
                SoilWater: same as Validation.New Zealand.ScottFarm.ScottFarmC.ScottFarmC17a.Field.HorotiuSoil.SoilWater
                SoilNitrogen: fom_type=[default, manure, mucuna, lablab, shemp, stable]; fract_carb=[0.2, 0.3, 0.54, 0.57, 0.45, 0]; fract_cell=[0.7, 0.3, 0.37, 0.37, 0.47, 0.1]; fract_lign=[0.1, 0.4, 0.09, 0.06, 0.08, 0.9]; wfpsN2N2O_x=[22, 88]; wfpsN2N2O_y=[0.1, 1]
                SoilOrganicMatter: same as Validation.New Zealand.ScottFarm.ScottFarmC.ScottFarmC17a.Field.HorotiuSoil.SoilOrganicMatter
                InitialWater Initial water: PercentMethod=EvenlyDistributed; FractionFull=0.9
                Sample Initial nitrogen: NO3Units=ppm; NH4Units=ppm; SWUnits=Volumetric; OCUnits=Total; PHUnits=Water
                  Thickness  NO3  NH4
                  200        15   0.5
                  200        10   0.2
                  600        5    0.093
                  500        1    0.093
                CERESSoilTemperature
              Plant Chicory: CropType=Chicory
              Report: EventNames=[Clock].DoReport
              SoluteManager
        Experiment ScottFarmFD902
          Memo
            This simulation was setup based on observed data from a defoliation trial at Scott farm, Hamilton, New Zealand, run from 2010 to 2012.  The study investigated the effect of cut height (i.e. rotation length) and residual height on chicory growth.  The treatments consisted of trigerring cuts when the sward reached heights of 150, 250, 350, and 500 mm, in factorial combination with two residual heights, 30-50 or 60-80 mm.  Harvest was avoided over winter.
            Trial plots were sown with chicory, cultivar '*Choice*' (6.7 kg/ha), after previous pasture was sprayed with herbicide and conventionally drilled.  Irrigation was applied in the first year and fertiliser was applied over summer.  Results reported include yield, botanical composition, plant density, leaf area and light interception (the later two only during one growing period - between two cuts).

            References:
            Lee, J.M.;  Hemmingson, N.R.; Minnee, E.M.K.; Clark, C.E.F. 2015. Management strategies for chicory (Cichorium intybus) and plantain (Plantago lanceolata): impact on dry matter yield, nutritive characteristics and plant density. Crop and Pasture Science, 66, 168–183.
          Factors
            Factor Defoliation: Specifications=[DefoliationSchedule]
              Operations 15To4
                2010-12-20  [Defoliate].Script.Defoliate(defoliationType: "Cut", amountDM: 35, amountType: "ResidualDM", duration: 1)
                2011-01-13  [Defoliate].Script.Defoliate(defoliationType: "Cut", amountDM: 35, amountType: "ResidualDM", duration: 1)
                2011-01-20  [Defoliate].Script.Defoliate(defoliationType: "Cut", amountDM: 35, amountType: "ResidualDM", duration: 1)
                2011-01-27  [Defoliate].Script.Defoliate(defoliationType: "Cut", amountDM: 35, amountType: "ResidualDM", duration: 1)
                2011-02-10  [Defoliate].Script.Defoliate(defoliationType: "Cut", amountDM: 35, amountType: "ResidualDM", duration: 1)
                2011-02-16  [Defoliate].Script.Defoliate(defoliationType: "Cut", amountDM: 35, amountType: "ResidualDM", duration: 1)
                2011-03-03  [Defoliate].Script.Defoliate(defoliationType: "Cut", amountDM: 35, amountType: "ResidualDM", duration: 1)
                2011-03-17  [Defoliate].Script.Defoliate(defoliationType: "Cut", amountDM: 35, amountType: "ResidualDM", duration: 1)
                2011-03-24  [Defoliate].Script.Defoliate(defoliationType: "Cut", amountDM: 45, amountType: "ResidualDM", duration: 1)
                2011-04-07  [Defoliate].Script.Defoliate(defoliationType: "Cut", amountDM: 45, amountType: "ResidualDM", duration: 1)
                2011-04-21  [Defoliate].Script.Defoliate(defoliationType: "Cut", amountDM: 45, amountType: "ResidualDM", duration: 1)
                2011-05-05  [Defoliate].Script.Defoliate(defoliationType: "Cut", amountDM: 45, amountType: "ResidualDM", duration: 1)
                2011-05-18  [Defoliate].Script.Defoliate(defoliationType: "Cut", amountDM: 45, amountType: "ResidualDM", duration: 1)
                2011-10-06  [Defoliate].Script.Defoliate(defoliationType: "Cut", amountDM: 45, amountType: "ResidualDM", duration: 1)
                2011-10-20  [Defoliate].Script.Defoliate(defoliationType: "Cut", amountDM: 45, amountType: "ResidualDM", duration: 1)
                2011-11-03  [Defoliate].Script.Defoliate(defoliationType: "Cut", amountDM: 45, amountType: "ResidualDM", duration: 1)
                2011-11-17  [Defoliate].Script.Defoliate(defoliationType: "Cut", amountDM: 45, amountType: "ResidualDM", duration: 1)
                2011-12-08  [Defoliate].Script.Defoliate(defoliationType: "Cut", amountDM: 45, amountType: "ResidualDM", duration: 1)
                2011-12-22  [Defoliate].Script.Defoliate(defoliationType: "Cut", amountDM: 45, amountType: "ResidualDM", duration: 1)
                2012-01-12  [Defoliate].Script.Defoliate(defoliationType: "Cut", amountDM: 45, amountType: "ResidualDM", duration: 1)
                2012-01-26  [Defoliate].Script.Defoliate(defoliationType: "Cut", amountDM: 45, amountType: "ResidualDM", duration: 1)
                2012-02-16  [Defoliate].Script.Defoliate(defoliationType: "Cut", amountDM: 45, amountType: "ResidualDM", duration: 1)
                2012-03-09  [Defoliate].Script.Defoliate(defoliationType: "Cut", amountDM: 45, amountType: "ResidualDM", duration: 1)
                2012-03-29  [Defoliate].Script.Defoliate(defoliationType: "Cut", amountDM: 45, amountType: "ResidualDM", duration: 1)
                2012-04-19  [Defoliate].Script.Defoliate(defoliationType: "Cut", amountDM: 45, amountType: "ResidualDM", duration: 1)
                2012-05-17  [Defoliate].Script.Defoliate(defoliationType: "Cut", amountDM: 45, amountType: "ResidualDM", duration: 1)
              Operations 15To7
                2010-12-20  [Defoliate].Script.Defoliate(defoliationType: "Cut", amountDM: 50, amountType: "ResidualDM", duration: 1)
                2011-01-13  [Defoliate].Script.Defoliate(defoliationType: "Cut", amountDM: 50, amountType: "ResidualDM", duration: 1)
                2011-01-20  [Defoliate].Script.Defoliate(defoliationType: "Cut", amountDM: 50, amountType: "ResidualDM", duration: 1)
                2011-01-27  [Defoliate].Script.Defoliate(defoliationType: "Cut", amountDM: 50, amountType: "ResidualDM", duration: 1)
                2011-02-03  [Defoliate].Script.Defoliate(defoliationType: "Cut", amountDM: 50, amountType: "ResidualDM", duration: 1)
                2011-02-10  [Defoliate].Script.Defoliate(defoliationType: "Cut", amountDM: 50, amountType: "ResidualDM", duration: 1)
                2011-02-16  [Defoliate].Script.Defoliate(defoliationType: "Cut", amountDM: 50, amountType: "ResidualDM", duration: 1)
                2011-03-03  [Defoliate].Script.Defoliate(defoliationType: "Cut", amountDM: 50, amountType: "ResidualDM", duration: 1)
                2011-03-17  [Defoliate].Script.Defoliate(defoliationType: "Cut", amountDM: 50, amountType: "ResidualDM", duration: 1)
                2011-03-24  [Defoliate].Script.Defoliate(defoliationType: "Cut", amountDM: 60, amountType: "ResidualDM", duration: 1)
                2011-04-07  [Defoliate].Script.Defoliate(defoliationType: "Cut", amountDM: 60, amountType: "ResidualDM", duration: 1)
                2011-04-21  [Defoliate].Script.Defoliate(defoliationType: "Cut", amountDM: 60, amountType: "ResidualDM", duration: 1)
                2011-05-05  [Defoliate].Script.Defoliate(defoliationType: "Cut", amountDM: 60, amountType: "ResidualDM", duration: 1)
                2011-05-18  [Defoliate].Script.Defoliate(defoliationType: "Cut", amountDM: 60, amountType: "ResidualDM", duration: 1)
                2011-10-06  [Defoliate].Script.Defoliate(defoliationType: "Cut", amountDM: 60, amountType: "ResidualDM", duration: 1)
                2011-10-20  [Defoliate].Script.Defoliate(defoliationType: "Cut", amountDM: 60, amountType: "ResidualDM", duration: 1)
                2011-11-03  [Defoliate].Script.Defoliate(defoliationType: "Cut", amountDM: 60, amountType: "ResidualDM", duration: 1)
                2011-11-17  [Defoliate].Script.Defoliate(defoliationType: "Cut", amountDM: 60, amountType: "ResidualDM", duration: 1)
                2011-12-08  [Defoliate].Script.Defoliate(defoliationType: "Cut", amountDM: 60, amountType: "ResidualDM", duration: 1)
                2011-12-22  [Defoliate].Script.Defoliate(defoliationType: "Cut", amountDM: 60, amountType: "ResidualDM", duration: 1)
                2012-01-12  [Defoliate].Script.Defoliate(defoliationType: "Cut", amountDM: 60, amountType: "ResidualDM", duration: 1)
                2012-01-26  [Defoliate].Script.Defoliate(defoliationType: "Cut", amountDM: 60, amountType: "ResidualDM", duration: 1)
                2012-02-16  [Defoliate].Script.Defoliate(defoliationType: "Cut", amountDM: 60, amountType: "ResidualDM", duration: 1)
                2012-03-09  [Defoliate].Script.Defoliate(defoliationType: "Cut", amountDM: 60, amountType: "ResidualDM", duration: 1)
                2012-03-29  [Defoliate].Script.Defoliate(defoliationType: "Cut", amountDM: 60, amountType: "ResidualDM", duration: 1)
                2012-04-19  [Defoliate].Script.Defoliate(defoliationType: "Cut", amountDM: 60, amountType: "ResidualDM", duration: 1)
                2012-05-17  [Defoliate].Script.Defoliate(defoliationType: "Cut", amountDM: 60, amountType: "ResidualDM", duration: 1)
              Operations 25To4
                2010-12-20  [Defoliate].Script.Defoliate(defoliationType: "Cut", amountDM: 35, amountType: "ResidualDM", duration: 1)
                2011-01-13  [Defoliate].Script.Defoliate(defoliationType: "Cut", amountDM: 35, amountType: "ResidualDM", duration: 1)
                2011-01-27  [Defoliate].Script.Defoliate(defoliationType: "Cut", amountDM: 35, amountType: "ResidualDM", duration: 1)
                2011-02-10  [Defoliate].Script.Defoliate(defoliationType: "Cut", amountDM: 35, amountType: "ResidualDM", duration: 1)
                2011-02-24  [Defoliate].Script.Defoliate(defoliationType: "Cut", amountDM: 35, amountType: "ResidualDM", duration: 1)
                2011-03-10  [Defoliate].Script.Defoliate(defoliationType: "Cut", amountDM: 35, amountType: "ResidualDM", duration: 1)
                2011-03-24  [Defoliate].Script.Defoliate(defoliationType: "Cut", amountDM: 45, amountType: "ResidualDM", duration: 1)
                2011-04-14  [Defoliate].Script.Defoliate(defoliationType: "Cut", amountDM: 45, amountType: "ResidualDM", duration: 1)
                2011-05-18  [Defoliate].Script.Defoliate(defoliationType: "Cut", amountDM: 45, amountType: "ResidualDM", duration: 1)
                2011-10-13  [Defoliate].Script.Defoliate(defoliationType: "Cut", amountDM: 45, amountType: "ResidualDM", duration: 1)
                2011-10-27  [Defoliate].Script.Defoliate(defoliationType: "Cut", amountDM: 45, amountType: "ResidualDM", duration: 1)
                2011-11-10  [Defoliate].Script.Defoliate(defoliationType: "Cut", amountDM: 45, amountType: "ResidualDM", duration: 1)
                2011-12-08  [Defoliate].Script.Defoliate(defoliationType: "Cut", amountDM: 45, amountType: "ResidualDM", duration: 1)
                2012-01-05  [Defoliate].Script.Defoliate(defoliationType: "Cut", amountDM: 45, amountType: "ResidualDM", duration: 1)
                2012-01-26  [Defoliate].Script.Defoliate(defoliationType: "Cut", amountDM: 45, amountType: "ResidualDM", duration: 1)
                2012-02-16  [Defoliate].Script.Defoliate(defoliationType: "Cut", amountDM: 45, amountType: "ResidualDM", duration: 1)
                2012-03-09  [Defoliate].Script.Defoliate(defoliationType: "Cut", amountDM: 45, amountType: "ResidualDM", duration: 1)
                2012-03-29  [Defoliate].Script.Defoliate(defoliationType: "Cut", amountDM: 45, amountType: "ResidualDM", duration: 1)
                2012-05-03  [Defoliate].Script.Defoliate(defoliationType: "Cut", amountDM: 45, amountType: "ResidualDM", duration: 1)
                2012-05-24  [Defoliate].Script.Defoliate(defoliationType: "Cut", amountDM: 45, amountType: "ResidualDM", duration: 1)
              Operations 25To7
                2010-12-20  [Defoliate].Script.Defoliate(defoliationType: "Cut", amountDM: 50, amountType:"ResidualDM", duration: 1)
                2011-01-13  [Defoliate].Script.Defoliate(defoliationType: "Cut", amountDM: 50, amountType:"ResidualDM", duration: 1)
                2011-01-27  [Defoliate].Script.Defoliate(defoliationType: "Cut", amountDM: 50, amountType:"ResidualDM", duration: 1)
                2011-02-10  [Defoliate].Script.Defoliate(defoliationType: "Cut", amountDM: 50, amountType:"ResidualDM", duration: 1)
                2011-02-24  [Defoliate].Script.Defoliate(defoliationType: "Cut", amountDM: 50, amountType:"ResidualDM", duration: 1)
                2011-03-10  [Defoliate].Script.Defoliate(defoliationType: "Cut", amountDM: 50, amountType:"ResidualDM", duration: 1)
                2011-03-24  [Defoliate].Script.Defoliate(defoliationType: "Cut", amountDM: 60, amountType:"ResidualDM", duration: 1)
                2011-04-14  [Defoliate].Script.Defoliate(defoliationType: "Cut", amountDM: 60, amountType:"ResidualDM", duration: 1)
                2011-05-18  [Defoliate].Script.Defoliate(defoliationType: "Cut", amountDM: 60, amountType:"ResidualDM", duration: 1)
                2011-10-13  [Defoliate].Script.Defoliate(defoliationType: "Cut", amountDM: 60, amountType:"ResidualDM", duration: 1)
                2011-10-27  [Defoliate].Script.Defoliate(defoliationType: "Cut", amountDM: 60, amountType:"ResidualDM", duration: 1)
                2011-11-10  [Defoliate].Script.Defoliate(defoliationType: "Cut", amountDM: 60, amountType:"ResidualDM", duration: 1)
                2011-12-08  [Defoliate].Script.Defoliate(defoliationType: "Cut", amountDM: 60, amountType:"ResidualDM", duration: 1)
                2012-01-05  [Defoliate].Script.Defoliate(defoliationType: "Cut", amountDM: 60, amountType:"ResidualDM", duration: 1)
                2012-01-26  [Defoliate].Script.Defoliate(defoliationType: "Cut", amountDM: 60, amountType:"ResidualDM", duration: 1)
                2012-02-16  [Defoliate].Script.Defoliate(defoliationType: "Cut", amountDM: 60, amountType:"ResidualDM", duration: 1)
                2012-03-09  [Defoliate].Script.Defoliate(defoliationType: "Cut", amountDM: 60, amountType:"ResidualDM", duration: 1)
                2012-03-29  [Defoliate].Script.Defoliate(defoliationType: "Cut", amountDM: 60, amountType:"ResidualDM", duration: 1)
                2012-05-03  [Defoliate].Script.Defoliate(defoliationType: "Cut", amountDM: 60, amountType:"ResidualDM", duration: 1)
                2012-05-24  [Defoliate].Script.Defoliate(defoliationType: "Cut", amountDM: 60, amountType:"ResidualDM", duration: 1)
              Operations 35To4
                2010-12-20  [Defoliate].Script.Defoliate(defoliationType: "Cut", amountDM: 35, amountType: "ResidualDM", duration: 1)
                2011-01-13  [Defoliate].Script.Defoliate(defoliationType: "Cut", amountDM: 35, amountType: "ResidualDM", duration: 1)
                2011-02-03  [Defoliate].Script.Defoliate(defoliationType: "Cut", amountDM: 35, amountType: "ResidualDM", duration: 1)
                2011-02-24  [Defoliate].Script.Defoliate(defoliationType: "Cut", amountDM: 35, amountType: "ResidualDM", duration: 1)
                2011-03-17  [Defoliate].Script.Defoliate(defoliationType: "Cut", amountDM: 35, amountType: "ResidualDM", duration: 1)
                2011-04-14  [Defoliate].Script.Defoliate(defoliationType: "Cut", amountDM: 45, amountType: "ResidualDM", duration: 1)
                2011-05-18  [Defoliate].Script.Defoliate(defoliationType: "Cut", amountDM: 45, amountType: "ResidualDM", duration: 1)
                2011-10-20  [Defoliate].Script.Defoliate(defoliationType: "Cut", amountDM: 45, amountType: "ResidualDM", duration: 1)
                2011-11-10  [Defoliate].Script.Defoliate(defoliationType: "Cut", amountDM: 45, amountType: "ResidualDM", duration: 1)
                2011-12-15  [Defoliate].Script.Defoliate(defoliationType: "Cut", amountDM: 45, amountType: "ResidualDM", duration: 1)
                2012-01-19  [Defoliate].Script.Defoliate(defoliationType: "Cut", amountDM: 45, amountType: "ResidualDM", duration: 1)
                2012-02-24  [Defoliate].Script.Defoliate(defoliationType: "Cut", amountDM: 45, amountType: "ResidualDM", duration: 1)
                2012-04-05  [Defoliate].Script.Defoliate(defoliationType: "Cut", amountDM: 45, amountType: "ResidualDM", duration: 1)
                2012-05-24  [Defoliate].Script.Defoliate(defoliationType: "Cut", amountDM: 45, amountType: "ResidualDM", duration: 1)
              Operations 35To7
                2010-12-20  [Defoliate].Script.Defoliate(defoliationType: "Cut", amountDM: 50, amountType: "ResidualDM", duration: 1)
                2011-01-13  [Defoliate].Script.Defoliate(defoliationType: "Cut", amountDM: 50, amountType: "ResidualDM", duration: 1)
                2011-02-03  [Defoliate].Script.Defoliate(defoliationType: "Cut", amountDM: 50, amountType: "ResidualDM", duration: 1)
                2011-02-24  [Defoliate].Script.Defoliate(defoliationType: "Cut", amountDM: 50, amountType: "ResidualDM", duration: 1)
                2011-03-17  [Defoliate].Script.Defoliate(defoliationType: "Cut", amountDM: 50, amountType: "ResidualDM", duration: 1)
                2011-04-14  [Defoliate].Script.Defoliate(defoliationType: "Cut", amountDM: 60, amountType: "ResidualDM", duration: 1)
                2011-05-18  [Defoliate].Script.Defoliate(defoliationType: "Cut", amountDM: 60, amountType: "ResidualDM", duration: 1)
                2011-10-20  [Defoliate].Script.Defoliate(defoliationType: "Cut", amountDM: 60, amountType: "ResidualDM", duration: 1)
                2011-11-10  [Defoliate].Script.Defoliate(defoliationType: "Cut", amountDM: 60, amountType: "ResidualDM", duration: 1)
                2011-12-15  [Defoliate].Script.Defoliate(defoliationType: "Cut", amountDM: 60, amountType: "ResidualDM", duration: 1)
                2012-01-19  [Defoliate].Script.Defoliate(defoliationType: "Cut", amountDM: 60, amountType: "ResidualDM", duration: 1)
                2012-02-24  [Defoliate].Script.Defoliate(defoliationType: "Cut", amountDM: 60, amountType: "ResidualDM", duration: 1)
                2012-04-05  [Defoliate].Script.Defoliate(defoliationType: "Cut", amountDM: 60, amountType: "ResidualDM", duration: 1)
                2012-05-24  [Defoliate].Script.Defoliate(defoliationType: "Cut", amountDM: 60, amountType: "ResidualDM", duration: 1)
              Operations 55To4
                2010-12-20  [Defoliate].Script.Defoliate(defoliationType: "Cut", amountDM: 35, amountType: "ResidualDM", duration: 1)
                2011-01-13  [Defoliate].Script.Defoliate(defoliationType: "Cut", amountDM: 35, amountType: "ResidualDM", duration: 1)
                2011-02-16  [Defoliate].Script.Defoliate(defoliationType: "Cut", amountDM: 35, amountType: "ResidualDM", duration: 1)
                2011-03-31  [Defoliate].Script.Defoliate(defoliationType: "Cut", amountDM: 45, amountType: "ResidualDM", duration: 1)
                2011-05-18  [Defoliate].Script.Defoliate(defoliationType: "Cut", amountDM: 45, amountType: "ResidualDM", duration: 1)
                2011-10-27  [Defoliate].Script.Defoliate(defoliationType: "Cut", amountDM: 45, amountType: "ResidualDM", duration: 1)
                2011-12-15  [Defoliate].Script.Defoliate(defoliationType: "Cut", amountDM: 45, amountType: "ResidualDM", duration: 1)
                2012-01-19  [Defoliate].Script.Defoliate(defoliationType: "Cut", amountDM: 45, amountType: "ResidualDM", duration: 1)
                2012-02-24  [Defoliate].Script.Defoliate(defoliationType: "Cut", amountDM: 45, amountType: "ResidualDM", duration: 1)
                2012-04-12  [Defoliate].Script.Defoliate(defoliationType: "Cut", amountDM: 45, amountType: "ResidualDM", duration: 1)
                2012-05-24  [Defoliate].Script.Defoliate(defoliationType: "Cut", amountDM: 45, amountType: "ResidualDM", duration: 1)
              Operations 55To7
                2010-12-20  [Defoliate].Script.Defoliate(defoliationType: "Cut", amountDM: 50, amountType: "ResidualDM", duration: 1)
                2011-01-13  [Defoliate].Script.Defoliate(defoliationType: "Cut", amountDM: 50, amountType: "ResidualDM", duration: 1)
                2011-02-16  [Defoliate].Script.Defoliate(defoliationType: "Cut", amountDM: 50, amountType: "ResidualDM", duration: 1)
                2011-03-31  [Defoliate].Script.Defoliate(defoliationType: "Cut", amountDM: 60, amountType: "ResidualDM", duration: 1)
                2011-05-18  [Defoliate].Script.Defoliate(defoliationType: "Cut", amountDM: 60, amountType: "ResidualDM", duration: 1)
                2011-10-27  [Defoliate].Script.Defoliate(defoliationType: "Cut", amountDM: 60, amountType: "ResidualDM", duration: 1)
                2011-12-15  [Defoliate].Script.Defoliate(defoliationType: "Cut", amountDM: 60, amountType: "ResidualDM", duration: 1)
                2012-01-19  [Defoliate].Script.Defoliate(defoliationType: "Cut", amountDM: 60, amountType: "ResidualDM", duration: 1)
                2012-02-24  [Defoliate].Script.Defoliate(defoliationType: "Cut", amountDM: 60, amountType: "ResidualDM", duration: 1)
                2012-04-12  [Defoliate].Script.Defoliate(defoliationType: "Cut", amountDM: 60, amountType: "ResidualDM", duration: 1)
                2012-05-24  [Defoliate].Script.Defoliate(defoliationType: "Cut", amountDM: 60, amountType: "ResidualDM", duration: 1)
          Simulation FD902
            Clock: StartDate=2010-10-01; EndDate=2012-06-30
            Weather: FileName=Ruakura.met
            Summary summaryfile
            SoilArbitrator Soil Arbitrator
            Zone Field: Area=1; Slope=0
              Folder Management
                Operations Sowing
                  2010-10-13  [Chicory].Sow(population: 200, cultivar: "Choice", depth: 10, rowSpacing: 150)
                Operations DefoliationSchedule
                Operations FertiliserSchedule
                  2010-10-05  [Fertiliser].Apply(Amount: 30, Type: Fertiliser.Types.UreaN, Depth: 50)
                  2011-12-15  [Fertiliser].Apply(Amount: 39, Type: Fertiliser.Types.UreaN, Depth: 10)
                  2012-01-19  [Fertiliser].Apply(Amount: 39, Type: Fertiliser.Types.UreaN, Depth: 10)
                  2012-02-23  [Fertiliser].Apply(Amount: 39, Type: Fertiliser.Types.UreaN, Depth: 10)
                  2012-03-29  [Fertiliser].Apply(Amount: 39, Type: Fertiliser.Types.UreaN, Depth: 10)
                  2012-05-03  [Fertiliser].Apply(Amount: 39, Type: Fertiliser.Types.UreaN, Depth: 10)
                  2012-11-15  [Fertiliser].Apply(Amount: 28, Type: Fertiliser.Types.UreaN, Depth: 10)
                  2012-12-20  [Fertiliser].Apply(Amount: 28, Type: Fertiliser.Types.UreaN, Depth: 10)
                  2013-01-27  [Fertiliser].Apply(Amount: 28, Type: Fertiliser.Types.UreaN, Depth: 10)
                  2013-03-10  [Fertiliser].Apply(Amount: 28, Type: Fertiliser.Types.UreaN, Depth: 10)
                Operations IrrigationSchedule
                  2010-11-30  [Irrigation].Apply(amount: 25.4)
                  2010-12-10  [Irrigation].Apply(amount: 25.2)
                  2010-12-14  [Irrigation].Apply(amount: 9.2)
                  2010-12-15  [Irrigation].Apply(amount: 29.8)
                  2011-01-05  [Irrigation].Apply(amount: 41.2)
                  2011-02-01  [Irrigation].Apply(amount: 55)
                  2011-02-04  [Irrigation].Apply(amount: 13.7)
                  2011-02-11  [Irrigation].Apply(amount: 36.6)
                  2011-02-23  [Irrigation].Apply(amount: 18.3)
                  2011-03-04  [Irrigation].Apply(amount: 36.6)
                  2011-03-13  [Irrigation].Apply(amount: 4.6)
                  2011-03-17  [Irrigation].Apply(amount: 36.6)
                  2011-11-30  [Irrigation].Apply(amount: 36.6)
                Manager Defoliate: same as Validation.New Zealand.ScottFarm.ScottFarmC.ScottFarmC17a.Field.Management.Defoliate
                Manager ExtraVariables
                  script: same as in Validation.New Zealand.ScottFarm.ScottFarmC.ScottFarmC17a.Field.Management.ExtraVariables
              MicroClimate: a_interception=0; b_interception=1; c_interception=0; d_interception=0; soil_albedo=0.23; sun_angle=15; soil_heat_flux_fraction=0.4; night_interception_fraction=0.5; refheight=2; albedo=0.15; emissivity=0.96; RadIntTotal=0
              Irrigation
              Fertiliser
              SurfaceOrganicMatter: PoolName=grass; type=grass; mass=500; standing_fraction=0; cnr=40; CriticalResidueWeight=2000; OptimumDecompTemp=20; MaxCumulativeEOS=20; CNRatioDecompCoeff=0.277; CNRatioDecompThreshold=25; TotalLeachRain=25; MinRainToLeach=10; CriticalMinimumOrganicC=0.004; DefaultCPRatio=0; DefaultStandingFraction=0; StandingExtinctCoeff=0.5; FractionFaecesAdded=0.5
                Pools:
                  {PoolName=grass, ResidueType=grass, Mass=500, CNRatio=40, StandingFraction=0}
                ResidueTypes ResidueTypesList: LoadFromResource=ResidueTypes
              Soil HorotiuSoil: same as Validation.New Zealand.ScottFarm.ScottFarmE.ScottFarmEstablishment.Field.HorotiuSoil
              Plant Chicory: CropType=Chicory
              Report: EventNames=[Clock].DoReport
              SoluteManager
        Memo SubTitle
          ### All data from Scott Farm
      Experiment Iversen
        Memo
          This simulation setup was based on a dataset supplied by Hamish Brown, which was collected for his PhD thesis.  The trial was conducted at the Iversen field of Lincoln University, in Lincoln, New Zealand between 1996 and 2002.  The work was focused on understanding water use and its interaction with yield of dryland and irrigated forage crops (lucerne, chicory and red clover were used).
          The trial was implemented in spring of 1996, after conventional cultivation, including subsoiling and liming.  Chicory (cultivar '*Puna*') was sown at a rate of 3.5 kg/ha and was grazed regularly by sheep.  There were annual applications of superphosphate but no N fertilisation (except excreta from grazing sheep).  The treatments consisted of  irrigation versus dryland conditions.  The major parameters analysed were herbage growth and yield, population, nutritive characteristics, and water utilisation.
          Soil data was obtained from measurements presented by Brown (2004) and complemented by S-MAP database from Landcare Research Limited. Weather data was obtained from the nearby Broadfields met station in Lincoln.

          References:
          Brown, H.E. 2004. Understanding yield and water use of dryland forage crops in New Zealand. PhD thesis, Lincoln University, Lincoln, NZ. 288 p.
          Brown, H.E.; Moot, D.J.; & Pollock, K.M. 2003. Long term growth rates and water extraction patterns of dryland chicory, lucerne and red clover. Legumes for dryland pastures. New Zealand Grassland Association, Research Practice Series, 11:91-99.
          Brown, H.E.; Moot, D.J.; & Pollock, K.M. 2005. Herbage production, persistence, nutritive characteristics and water use of perennial forages grown over 6 years on a Wakanui silt loam. New Zealand Journal of Agricultural Research, 48(4):423-439.
        Factors
          Factor Irrigation: Specifications=[IrrigationSchedule]
            Operations Full
              1996-10-21  [Irrigation].Apply(amount: 40)
              1996-12-04  [Irrigation].Apply(amount: 40)
              1997-10-31  [Irrigation].Apply(amount: 30)
              1997-12-03  [Irrigation].Apply(amount: 50)
              1997-12-17  [Irrigation].Apply(amount: 40)
              1998-01-16  [Irrigation].Apply(amount: 30)
              1998-01-23  [Irrigation].Apply(amount: 26)
              1998-02-19  [Irrigation].Apply(amount: 62)
              1998-03-06  [Irrigation].Apply(amount: 23)
              1998-03-31  [Irrigation].Apply(amount: 31)
              1998-09-12  [Irrigation].Apply(amount: 90)
              1998-11-16  [Irrigation].Apply(amount: 150)
              1999-01-23  [Irrigation].Apply(amount: 127)
              1999-02-27  [Irrigation].Apply(amount: 70)
              1999-12-12  [Irrigation].Apply(amount: 30)
              2000-01-23  [Irrigation].Apply(amount: 50)
              2000-12-29  [Irrigation].Apply(amount: 75)
              2001-02-03  [Irrigation].Apply(amount: 95)
              2001-03-21  [Irrigation].Apply(amount: 65)
              2001-04-27  [Irrigation].Apply(amount: 45)
              2001-12-21  [Irrigation].Apply(amount: 65)
            Operations Nil
              1998-09-15  [Irrigation].Apply(amount: 150)
        Simulation Iversen
          Weather: FileName=Lincoln-Broadfields.met
          Clock: StartDate=1996-09-20; EndDate=2002-07-05
          Summary summaryfile
          SoilArbitrator Soil Arbitrator
          Zone Field: Area=1; Slope=0
            Folder Management
              Operations Sowing
                1996-11-01  [Chicory].Sow(population: 115, cultivar: "Puna", depth: 10, rowSpacing: 150)
              Operations DefoliationSchedule
                1997-02-21  [Defoliate].Script.Defoliate(defoliationType: "Graze", amountDM: 20, amountType: "ResidualDM", duration: 10)
                1997-06-05  [Defoliate].Script.Defoliate(defoliationType: "Graze", amountDM: 10, amountType: "ResidualDM", duration: 6)
                1997-10-06  [Defoliate].Script.Defoliate(defoliationType: "Graze", amountDM: 20, amountType: "ResidualDM", duration: 7)
                1997-11-19  [Defoliate].Script.Defoliate(defoliationType: "Graze", amountDM: 50, amountType: "ResidualDM", duration: 7)
                1997-12-23  [Defoliate].Script.Defoliate(defoliationType: "Graze", amountDM: 45, amountType: "ResidualDM", duration: 7)
                1998-02-03  [Defoliate].Script.Defoliate(defoliationType: "Graze", amountDM: 50, amountType: "ResidualDM", duration: 6)
                1998-03-12  [Defoliate].Script.Defoliate(defoliationType: "Graze", amountDM: 20, amountType: "ResidualDM", duration: 6)
                1998-05-29  [Defoliate].Script.Defoliate(defoliationType: "Graze", amountDM: 10, amountType: "ResidualDM", duration: 6)
                1998-09-29  [Defoliate].Script.Defoliate(defoliationType: "Graze", amountDM: 20, amountType: "ResidualDM", duration: 11)
                1998-11-11  [Defoliate].Script.Defoliate(defoliationType: "Graze", amountDM: 30, amountType: "ResidualDM", duration: 6)
                1998-12-15  [Defoliate].Script.Defoliate(defoliationType: "Graze", amountDM: 35, amountType: "ResidualDM", duration: 8)
                1999-01-11  [Defoliate].Script.Defoliate(defoliationType: "Graze", amountDM: 35, amountType: "ResidualDM", duration: 9)
                1999-02-17  [Defoliate].Script.Defoliate(defoliationType: "Graze", amountDM: 30, amountType: "ResidualDM", duration: 8)
                1999-04-09  [Defoliate].Script.Defoliate(defoliationType: "Graze", amountDM: 25, amountType: "ResidualDM", duration: 14)
                1999-06-24  [Defoliate].Script.Defoliate(defoliationType: "Graze", amountDM: 8, amountType: "ResidualDM", duration: 4)
                1999-09-29  [Defoliate].Script.Defoliate(defoliationType: "Graze", amountDM: 20, amountType: "ResidualDM", duration: 8)
                1999-11-09  [Defoliate].Script.Defoliate(defoliationType: "Graze", amountDM: 40, amountType: "ResidualDM", duration: 9)
                1999-12-20  [Defoliate].Script.Defoliate(defoliationType: "Graze", amountDM: 45, amountType: "ResidualDM", duration: 7)
                2000-01-21  [Defoliate].Script.Defoliate(defoliationType: "Graze", amountDM: 40, amountType: "ResidualDM", duration: 6)
                2000-03-13  [Defoliate].Script.Defoliate(defoliationType: "Graze", amountDM: 30, amountType: "ResidualDM", duration: 6)
                2000-05-25  [Defoliate].Script.Defoliate(defoliationType: "Graze", amountDM: 10, amountType: "ResidualDM", duration: 5)
                2000-09-22  [Defoliate].Script.Defoliate(defoliationType: "Graze", amountDM: 30, amountType: "ResidualDM", duration: 10)
                2000-11-10  [Defoliate].Script.Defoliate(defoliationType: "Graze", amountDM: 40, amountType: "ResidualDM", duration: 7)
                2000-12-19  [Defoliate].Script.Defoliate(defoliationType: "Graze", amountDM: 30, amountType: "ResidualDM", duration: 9)
                2001-01-24  [Defoliate].Script.Defoliate(defoliationType: "Graze", amountDM: 30, amountType: "ResidualDM", duration: 7)
                2001-03-11  [Defoliate].Script.Defoliate(defoliationType: "Graze", amountDM: 30, amountType: "ResidualDM", duration: 7)
                2001-05-02  [Defoliate].Script.Defoliate(defoliationType: "Graze", amountDM: 15, amountType: "ResidualDM", duration: 5)
                2001-06-24  [Defoliate].Script.Defoliate(defoliationType: "Graze", amountDM: 10, amountType: "ResidualDM", duration: 11)
                2001-10-03  [Defoliate].Script.Defoliate(defoliationType: "Graze", amountDM: 20, amountType: "ResidualDM", duration: 8)
                2001-11-21  [Defoliate].Script.Defoliate(defoliationType: "Graze", amountDM: 40, amountType: "ResidualDM", duration: 6)
                2001-12-22  [Defoliate].Script.Defoliate(defoliationType: "Graze", amountDM: 45, amountType: "ResidualDM", duration: 9)
                2002-02-06  [Defoliate].Script.Defoliate(defoliationType: "Graze", amountDM: 30, amountType: "ResidualDM", duration: 10)
                2002-04-03  [Defoliate].Script.Defoliate(defoliationType: "Graze", amountDM: 20, amountType: "ResidualDM", duration: 15)
                2002-06-24  [Defoliate].Script.Defoliate(defoliationType: "Graze", amountDM: 10, amountType: "ResidualDM", duration: 12)
              Operations IrrigationSchedule
              Manager Defoliate: same as Validation.New Zealand.ScottFarm.ScottFarmC.ScottFarmC17a.Field.Management.Defoliate
              Operations ExcretaSchedule
                1997-02-25  [SurfaceOrganicMatter].Add(mass: 107.4, N: 19.2, P: 0.0, type: "RuminantDung_PastureFed", name "dung")
                1997-02-25  [Fertiliser].Apply(Amount: 28.8, Type: Fertiliser.Types.UreaN, Depth: 30)
                1997-06-07  [SurfaceOrganicMatter].Add(mass: 163.2, N: 29.1, P: 0.0, type: "RuminantDung_PastureFed", name "dung")
                1997-06-07  [Fertiliser].Apply(Amount: 43.7, Type: Fertiliser.Types.UreaN, Depth: 30)
                1997-10-09  [SurfaceOrganicMatter].Add(mass: 98.5, N: 17.6, P: 0.0, type: "RuminantDung_PastureFed", name "dung")
                1997-10-09  [Fertiliser].Apply(Amount: 26.4, Type: Fertiliser.Types.UreaN, Depth: 30)
                1997-11-22  [SurfaceOrganicMatter].Add(mass: 150.1, N: 26.8, P: 0.0, type: "RuminantDung_PastureFed", name "dung")
                1997-11-22  [Fertiliser].Apply(Amount: 40.2, Type: Fertiliser.Types.UreaN, Depth: 30)
                1997-12-26  [SurfaceOrganicMatter].Add(mass: 69.8, N: 12.5, P: 0.0, type: "RuminantDung_PastureFed", name "dung")
                1997-12-26  [Fertiliser].Apply(Amount: 18.7, Type: Fertiliser.Types.UreaN, Depth: 30)
                1998-02-05  [SurfaceOrganicMatter].Add(mass: 65.3, N: 11.7, P: 0.0, type: "RuminantDung_PastureFed", name "dung")
                1998-02-05  [Fertiliser].Apply(Amount: 17.5, Type: Fertiliser.Types.UreaN, Depth: 30)
                1998-03-14  [SurfaceOrganicMatter].Add(mass: 35.1, N: 6.3, P: 0.0, type: "RuminantDung_PastureFed", name "dung")
                1998-03-14  [Fertiliser].Apply(Amount: 9.4, Type: Fertiliser.Types.UreaN, Depth: 30)
                1998-05-31  [SurfaceOrganicMatter].Add(mass: 48.3, N: 8.6, P: 0.0, type: "RuminantDung_PastureFed", name "dung")
                1998-05-31  [Fertiliser].Apply(Amount: 12.9, Type: Fertiliser.Types.UreaN, Depth: 30)
                1998-10-04  [SurfaceOrganicMatter].Add(mass: 97.0, N: 17.3, P: 0.0, type: "RuminantDung_PastureFed", name "dung")
                1998-10-04  [Fertiliser].Apply(Amount: 26.0, Type: Fertiliser.Types.UreaN, Depth: 30)
                1998-11-13  [SurfaceOrganicMatter].Add(mass: 119.0, N: 21.2, P: 0.0, type: "RuminantDung_PastureFed", name "dung")
                1998-11-13  [Fertiliser].Apply(Amount: 31.9, Type: Fertiliser.Types.UreaN, Depth: 30)
                1998-12-18  [SurfaceOrganicMatter].Add(mass: 52.7, N: 9.4, P: 0.0, type: "RuminantDung_PastureFed", name "dung")
                1998-12-18  [Fertiliser].Apply(Amount: 14.1, Type: Fertiliser.Types.UreaN, Depth: 30)
                1999-01-15  [SurfaceOrganicMatter].Add(mass: 57.5, N: 10.3, P: 0.0, type: "RuminantDung_PastureFed", name "dung")
                1999-01-15  [Fertiliser].Apply(Amount: 15.4, Type: Fertiliser.Types.UreaN, Depth: 30)
                1999-02-20  [SurfaceOrganicMatter].Add(mass: 23.1, N: 4.1, P: 0.0, type: "RuminantDung_PastureFed", name "dung")
                1999-02-20  [Fertiliser].Apply(Amount: 6.2, Type: Fertiliser.Types.UreaN, Depth: 30)
                1999-04-15  [SurfaceOrganicMatter].Add(mass: 72.3, N: 12.9, P: 0.0, type: "RuminantDung_PastureFed", name "dung")
                1999-04-15  [Fertiliser].Apply(Amount: 19.4, Type: Fertiliser.Types.UreaN, Depth: 30)
                1999-06-25  [SurfaceOrganicMatter].Add(mass: 38.9, N: 6.9, P: 0.0, type: "RuminantDung_PastureFed", name "dung")
                1999-06-25  [Fertiliser].Apply(Amount: 10.4, Type: Fertiliser.Types.UreaN, Depth: 30)
                1999-10-02  [SurfaceOrganicMatter].Add(mass: 126.2, N: 22.5, P: 0.0, type: "RuminantDung_PastureFed", name "dung")
                1999-10-02  [Fertiliser].Apply(Amount: 33.8, Type: Fertiliser.Types.UreaN, Depth: 30)
                1999-11-13  [SurfaceOrganicMatter].Add(mass: 156.4, N: 27.9, P: 0.0, type: "RuminantDung_PastureFed", name "dung")
                1999-11-13  [Fertiliser].Apply(Amount: 41.9, Type: Fertiliser.Types.UreaN, Depth: 30)
                1999-12-23  [SurfaceOrganicMatter].Add(mass: 67.8, N: 12.1, P: 0.0, type: "RuminantDung_PastureFed", name "dung")
                1999-12-23  [Fertiliser].Apply(Amount: 18.2, Type: Fertiliser.Types.UreaN, Depth: 30)
                2000-01-23  [SurfaceOrganicMatter].Add(mass: 53.4, N: 9.5, P: 0.0, type: "RuminantDung_PastureFed", name "dung")
                2000-01-23  [Fertiliser].Apply(Amount: 14.3, Type: Fertiliser.Types.UreaN, Depth: 30)
                2000-03-15  [SurfaceOrganicMatter].Add(mass: 91.6, N: 16.4, P: 0.0, type: "RuminantDung_PastureFed", name "dung")
                2000-03-15  [Fertiliser].Apply(Amount: 24.5, Type: Fertiliser.Types.UreaN, Depth: 30)
                2000-05-27  [SurfaceOrganicMatter].Add(mass: 65.7, N: 11.7, P: 0.0, type: "RuminantDung_PastureFed", name "dung")
                2000-05-27  [Fertiliser].Apply(Amount: 17.6, Type: Fertiliser.Types.UreaN, Depth: 30)
                2000-09-26  [SurfaceOrganicMatter].Add(mass: 95.5, N: 17.1, P: 0.0, type: "RuminantDung_PastureFed", name "dung")
                2000-09-26  [Fertiliser].Apply(Amount: 25.6, Type: Fertiliser.Types.UreaN, Depth: 30)
                2000-11-13  [SurfaceOrganicMatter].Add(mass: 99.0, N: 17.7, P: 0.0, type: "RuminantDung_PastureFed", name "dung")
                2000-11-13  [Fertiliser].Apply(Amount: 26.5, Type: Fertiliser.Types.UreaN, Depth: 30)
                2000-12-23  [SurfaceOrganicMatter].Add(mass: 88.3, N: 15.8, P: 0.0, type: "RuminantDung_PastureFed", name "dung")
                2000-12-23  [Fertiliser].Apply(Amount: 23.7, Type: Fertiliser.Types.UreaN, Depth: 30)
                2001-01-27  [SurfaceOrganicMatter].Add(mass: 53.3, N: 9.5, P: 0.0, type: "RuminantDung_PastureFed", name "dung")
                2001-01-27  [Fertiliser].Apply(Amount: 14.3, Type: Fertiliser.Types.UreaN, Depth: 30)
                2001-03-14  [SurfaceOrganicMatter].Add(mass: 39.7, N: 7.1, P: 0.0, type: "RuminantDung_PastureFed", name "dung")
                2001-03-14  [Fertiliser].Apply(Amount: 10.6, Type: Fertiliser.Types.UreaN, Depth: 30)
                2001-05-04  [SurfaceOrganicMatter].Add(mass: 33.1, N: 5.9, P: 0.0, type: "RuminantDung_PastureFed", name "dung")
                2001-05-04  [Fertiliser].Apply(Amount: 8.9, Type: Fertiliser.Types.UreaN, Depth: 30)
                2001-06-29  [SurfaceOrganicMatter].Add(mass: 11.0, N: 2.0, P: 0.0, type: "RuminantDung_PastureFed", name "dung")
                2001-06-29  [Fertiliser].Apply(Amount: 3.0, Type: Fertiliser.Types.UreaN, Depth: 30)
                2001-10-06  [SurfaceOrganicMatter].Add(mass: 103.5, N: 18.5, P: 0.0, type: "RuminantDung_PastureFed", name "dung")
                2001-10-06  [Fertiliser].Apply(Amount: 27.7, Type: Fertiliser.Types.UreaN, Depth: 30)
                2001-11-23  [SurfaceOrganicMatter].Add(mass: 100.6, N: 18.0, P: 0.0, type: "RuminantDung_PastureFed", name "dung")
                2001-11-23  [Fertiliser].Apply(Amount: 26.9, Type: Fertiliser.Types.UreaN, Depth: 30)
                2001-12-26  [SurfaceOrganicMatter].Add(mass: 61.1, N: 10.9, P: 0.0, type: "RuminantDung_PastureFed", name "dung")
                2001-12-26  [Fertiliser].Apply(Amount: 16.4, Type: Fertiliser.Types.UreaN, Depth: 30)
                2002-02-10  [SurfaceOrganicMatter].Add(mass: 51.1, N: 9.1, P: 0.0, type: "RuminantDung_PastureFed", name "dung")
                2002-02-10  [Fertiliser].Apply(Amount: 13.7, Type: Fertiliser.Types.UreaN, Depth: 30)
                2002-04-10  [SurfaceOrganicMatter].Add(mass: 28.6, N: 5.1, P: 0.0, type: "RuminantDung_PastureFed", name "dung")
                2002-04-10  [Fertiliser].Apply(Amount: 7.7, Type: Fertiliser.Types.UreaN, Depth: 30)
                2002-06-29  [SurfaceOrganicMatter].Add(mass: 25.2, N: 4.5, P: 0.0, type: "RuminantDung_PastureFed", name "dung")
                2002-06-29  [Fertiliser].Apply(Amount: 6.8, Type: Fertiliser.Types.UreaN, Depth: 30)
              Manager ExtraVariables
                script: same as in Validation.New Zealand.ScottFarm.ScottFarmC.ScottFarmC17a.Field.Management.ExtraVariables
            MicroClimate: a_interception=0; b_interception=1; c_interception=0; d_interception=0; soil_albedo=0.23; sun_angle=15; soil_heat_flux_fraction=0.4; night_interception_fraction=0.5; refheight=2; albedo=0.15; emissivity=0.96; RadIntTotal=0
            Irrigation
            Fertiliser
            SurfaceOrganicMatter: PoolName=maize; type=maize; mass=500; standing_fraction=0; cnr=65; CriticalResidueWeight=2000; OptimumDecompTemp=20; MaxCumulativeEOS=20; CNRatioDecompCoeff=0.277; CNRatioDecompThreshold=25; TotalLeachRain=25; MinRainToLeach=10; CriticalMinimumOrganicC=0.004; DefaultCPRatio=0; DefaultStandingFraction=0; StandingExtinctCoeff=0.5; FractionFaecesAdded=0.5
              Pools:
                {PoolName=maize, ResidueType=maize, Mass=500, CNRatio=65, StandingFraction=0}
              ResidueTypes ResidueTypesList: LoadFromResource=ResidueTypes
            Soil Wakanui-Iverseen: SoilType=Udic Ustochrept (US),  Immature Pallic Soil (NZ); LocalName=Wakanui Silt Loam; Site=Iverseen field; NearestTown=Lincoln; Region=Canterbury; Country=New Zealand; Latitude=0; Longitude=0; DataSource=Hamish Brown PhD Thesis
              Comments=The physical properties are averages from Hamish's Thesis, Ks and biochemical data from similar soils (from NZ-NSD), texture is a rough estimate only
              Analysis: PHUnits=Water; BoronUnits=HotWater
                Thickness  Rocks  PH  CEC  ParticleSizeSand  ParticleSizeSilt  ParticleSizeClay
                150        0      6   20   10                60                30
                150        0      6   15   10                60                30
                400        0      6   12   10                60                30
                200        0      6   10   15                55                30
                150        0      6   10   40                45                15
                450        0      6   10   35                45                20
                150        0      6   10   30                50                20
                350        0      6   8    30                50                20
                300        0      6   8    30                50                20
              Water
                Thickness  BD    AirDry  LL15  DUL   SAT   KS
                150        1.33  0.12    0.29  0.4   0.5   183.9
                150        1.37  0.22    0.25  0.38  0.48  95.1
                400        1.45  0.15    0.15  0.32  0.45  6.2
                200        1.42  0.13    0.13  0.36  0.47  1.1
                150        1.29  0.13    0.13  0.35  0.51  1.1
                450        1.49  0.25    0.25  0.38  0.44  0.7
                150        1.61  0.33    0.33  0.36  0.39  0.5
                350        1.61  0.3     0.3   0.36  0.39  0.6
                300        1.68  0.28    0.28  0.34  0.37  0.6
                SoilCrop AgPastureSoil
                  LL=[0.293, 0.246, 0.152, 0.131, 0.134, 0.247, 0.327, 0.3, 0.283]
                  KL=[0.12, 0.12, 0.09, 0.04, 0.01, 0.01, 0, 0, 0]
                  XF=[1, 1, 0.8, 0.7, 0.85, 0.3, 0, 0, 0]
                SoilCrop ChicorySoil
                  LL=[0.293, 0.246, 0.152, 0.131, 0.134, 0.25, 0.327, 0.3, 0.283]
                  KL=[0.12, 0.12, 0.09, 0.04, 0.01, 0.01, 0, 0, 0]
                  XF=[1, 1, 0.8, 0.7, 0.85, 0.3, 0, 0, 0]
                SoilCrop WheatSoil
                  LL=[0.293, 0.246, 0.152, 0.131, 0.134, 0.247, 0.327, 0.3, 0.283]
                  KL=[0.12, 0.12, 0.09, 0.04, 0.01, 0.01, 0, 0, 0]
                  XF=[1, 1, 0.8, 0.7, 0.85, 0.3, 0, 0, 0]
                SoilCrop SlurpSoil
                  LL=[0.293, 0.246, 0.152, 0.131, 0.134, 0.247, 0.327, 0.3, 0.283]
                  KL=[0.12, 0.12, 0.09, 0.04, 0.01, 0.01, 0, 0, 0]
                  XF=[1, 1, 0.8, 0.7, 0.85, 0.3, 0, 0, 0]
              SoilWater: SummerDate=1-Nov; SummerU=6; SummerCona=3.5; WinterDate=1-apr; WinterU=2; WinterCona=2; DiffusConst=88; DiffusSlope=35; Salb=0.13; CN2Bare=73; CNRed=20; CNCov=0.8; max_pond=0; Thickness=[150, 150, 400, 200, 150, 450, 150, 350, 300]; SWCON=[0.5, 0.45, 0.25, 0.25, 0.4, 0.1, 0.15, 0.1, 0.1]; residueinterception=0
              SoilNitrogen: fom_type=[default, manure, mucuna, lablab, shemp, stable]; fract_carb=[0.2, 0.3, 0.54, 0.57, 0.45, 0]; fract_cell=[0.7, 0.3, 0.37, 0.37, 0.47, 0.1]; fract_lign=[0.1, 0.4, 0.09, 0.06, 0.08, 0.9]; wfpsN2N2O_x=[22, 88]; wfpsN2N2O_y=[0.1, 1]
              SoilOrganicMatter: RootCN=40; RootWt=1000; SoilCN=11.3; EnrACoeff=7.4; EnrBCoeff=0.2; OCUnits=Total
                Thickness  OC    FBiom  FInert
                150        4.25  0.105  0.6
                150        3.13  0.85   0.7
                400        0.88  0.02   0.8
                200        0.32  0.01   0.9
                150        0.25  0.008  0.95
                450        0.17  0.005  0.99
                800        0.1   0.005  0.99
              InitialWater Initial water: PercentMethod=FilledFromTop; FractionFull=0.99
              Sample Initial nitrogen: NO3Units=kgha; NH4Units=kgha; SWUnits=Volumetric; OCUnits=Total; PHUnits=Water
                Thickness  NO3  NH4
                150        15   1
                150        15   1
                400        20   1
                300        10   1
                1300       10   1
              CERESSoilTemperature
            Plant Chicory: CropType=Chicory
            Report: EventNames=[Clock].DoReport
            SoluteManager
      Experiment FRNLLincoln
        Memo
          Simulation setup based on field trial performed at Lincoln University Research Dairy Farm, New Zealand, between 2014 and 2016.  The experiment was part of the FRNL (Forages for Reduced Nitrogen Leaching) program and the data is basically unpublished (references will be added when they become available).
          The experiment consisted of six fertiliser treatments (N rates of 0, 50, 100, 200, 350 and 500 kg/ha/yr) in three replicates, and measurements comprised yield and quality indicators (here N content is used).
          Data supplied by Grant Edwards, Lincoln University.

          The soil at the experimental site was a Templeton fine sandy loam (an Immature Pallic soil, USDA: Udic Haplustept), the required parameters were inferred based on data from the New Zealand National Soils Database (Landcare Research).
          Weather data was obtained from nearby Broadfields weather station (NIWA).
        Factors
          Factor NRate: Specifications=[NRate]
            Operations 0
            Operations 50
              2014-10-08  [Fertiliser].Apply(Amount: 5, Type: Fertiliser.Types.UreaN, Depth: 10)
              2014-10-30  [Fertiliser].Apply(Amount: 5, Type: Fertiliser.Types.UreaN, Depth: 10)
              2014-11-25  [Fertiliser].Apply(Amount: 5, Type: Fertiliser.Types.UreaN, Depth: 10)
              2014-12-17  [Fertiliser].Apply(Amount: 5, Type: Fertiliser.Types.UreaN, Depth: 10)
              2015-01-15  [Fertiliser].Apply(Amount: 5, Type: Fertiliser.Types.UreaN, Depth: 10)
              2015-02-11  [Fertiliser].Apply(Amount: 5, Type: Fertiliser.Types.UreaN, Depth: 10)
              2015-03-10  [Fertiliser].Apply(Amount: 5, Type: Fertiliser.Types.UreaN, Depth: 10)
              2015-04-10  [Fertiliser].Apply(Amount: 5, Type: Fertiliser.Types.UreaN, Depth: 10)
              2015-05-19  [Fertiliser].Apply(Amount: 5, Type: Fertiliser.Types.UreaN, Depth: 10)
              2015-09-02  [Fertiliser].Apply(Amount: 5, Type: Fertiliser.Types.UreaN, Depth: 10)
              2015-10-06  [Fertiliser].Apply(Amount: 5, Type: Fertiliser.Types.UreaN, Depth: 10)
              2015-11-06  [Fertiliser].Apply(Amount: 5, Type: Fertiliser.Types.UreaN, Depth: 10)
              2015-12-07  [Fertiliser].Apply(Amount: 5, Type: Fertiliser.Types.UreaN, Depth: 10)
              2016-01-07  [Fertiliser].Apply(Amount: 5, Type: Fertiliser.Types.UreaN, Depth: 10)
              2016-02-04  [Fertiliser].Apply(Amount: 5, Type: Fertiliser.Types.UreaN, Depth: 10)
              2016-03-04  [Fertiliser].Apply(Amount: 5, Type: Fertiliser.Types.UreaN, Depth: 10)
              2016-03-31  [Fertiliser].Apply(Amount: 5, Type: Fertiliser.Types.UreaN, Depth: 10)
              2016-05-04  [Fertiliser].Apply(Amount: 5, Type: Fertiliser.Types.UreaN, Depth: 10)
              2016-08-30  [Fertiliser].Apply(Amount: 5, Type: Fertiliser.Types.UreaN, Depth: 10)
              2016-10-03  [Fertiliser].Apply(Amount: 5, Type: Fertiliser.Types.UreaN, Depth: 10)
              2016-10-28  [Fertiliser].Apply(Amount: 5, Type: Fertiliser.Types.UreaN, Depth: 10)
            Operations 100
              2014-10-08  [Fertiliser].Apply(Amount: 10, Type: Fertiliser.Types.UreaN, Depth: 10)
              2014-10-30  [Fertiliser].Apply(Amount: 10, Type: Fertiliser.Types.UreaN, Depth: 10)
              2014-11-25  [Fertiliser].Apply(Amount: 10, Type: Fertiliser.Types.UreaN, Depth: 10)
              2014-12-17  [Fertiliser].Apply(Amount: 10, Type: Fertiliser.Types.UreaN, Depth: 10)
              2015-01-15  [Fertiliser].Apply(Amount: 10, Type: Fertiliser.Types.UreaN, Depth: 10)
              2015-02-11  [Fertiliser].Apply(Amount: 10, Type: Fertiliser.Types.UreaN, Depth: 10)
              2015-03-10  [Fertiliser].Apply(Amount: 10, Type: Fertiliser.Types.UreaN, Depth: 10)
              2015-04-10  [Fertiliser].Apply(Amount: 10, Type: Fertiliser.Types.UreaN, Depth: 10)
              2015-05-19  [Fertiliser].Apply(Amount: 10, Type: Fertiliser.Types.UreaN, Depth: 10)
              2015-09-02  [Fertiliser].Apply(Amount: 10, Type: Fertiliser.Types.UreaN, Depth: 10)
              2015-10-06  [Fertiliser].Apply(Amount: 10, Type: Fertiliser.Types.UreaN, Depth: 10)
              2015-11-06  [Fertiliser].Apply(Amount: 10, Type: Fertiliser.Types.UreaN, Depth: 10)
              2015-12-07  [Fertiliser].Apply(Amount: 10, Type: Fertiliser.Types.UreaN, Depth: 10)
              2016-01-07  [Fertiliser].Apply(Amount: 10, Type: Fertiliser.Types.UreaN, Depth: 10)
              2016-02-04  [Fertiliser].Apply(Amount: 10, Type: Fertiliser.Types.UreaN, Depth: 10)
              2016-03-04  [Fertiliser].Apply(Amount: 10, Type: Fertiliser.Types.UreaN, Depth: 10)
              2016-03-31  [Fertiliser].Apply(Amount: 10, Type: Fertiliser.Types.UreaN, Depth: 10)
              2016-05-04  [Fertiliser].Apply(Amount: 10, Type: Fertiliser.Types.UreaN, Depth: 10)
              2016-08-30  [Fertiliser].Apply(Amount: 10, Type: Fertiliser.Types.UreaN, Depth: 10)
              2016-10-03  [Fertiliser].Apply(Amount: 10, Type: Fertiliser.Types.UreaN, Depth: 10)
              2016-10-28  [Fertiliser].Apply(Amount: 10, Type: Fertiliser.Types.UreaN, Depth: 10)
            Operations 200
              2014-10-08  [Fertiliser].Apply(Amount: 20, Type: Fertiliser.Types.UreaN, Depth: 10)
              2014-10-30  [Fertiliser].Apply(Amount: 20, Type: Fertiliser.Types.UreaN, Depth: 10)
              2014-11-25  [Fertiliser].Apply(Amount: 20, Type: Fertiliser.Types.UreaN, Depth: 10)
              2014-12-17  [Fertiliser].Apply(Amount: 20, Type: Fertiliser.Types.UreaN, Depth: 10)
              2015-01-15  [Fertiliser].Apply(Amount: 20, Type: Fertiliser.Types.UreaN, Depth: 10)
              2015-02-11  [Fertiliser].Apply(Amount: 20, Type: Fertiliser.Types.UreaN, Depth: 10)
              2015-03-10  [Fertiliser].Apply(Amount: 20, Type: Fertiliser.Types.UreaN, Depth: 10)
              2015-04-10  [Fertiliser].Apply(Amount: 20, Type: Fertiliser.Types.UreaN, Depth: 10)
              2015-05-19  [Fertiliser].Apply(Amount: 20, Type: Fertiliser.Types.UreaN, Depth: 10)
              2015-09-02  [Fertiliser].Apply(Amount: 20, Type: Fertiliser.Types.UreaN, Depth: 10)
              2015-10-06  [Fertiliser].Apply(Amount: 20, Type: Fertiliser.Types.UreaN, Depth: 10)
              2015-11-06  [Fertiliser].Apply(Amount: 20, Type: Fertiliser.Types.UreaN, Depth: 10)
              2015-12-07  [Fertiliser].Apply(Amount: 20, Type: Fertiliser.Types.UreaN, Depth: 10)
              2016-01-07  [Fertiliser].Apply(Amount: 20, Type: Fertiliser.Types.UreaN, Depth: 10)
              2016-02-04  [Fertiliser].Apply(Amount: 20, Type: Fertiliser.Types.UreaN, Depth: 10)
              2016-03-04  [Fertiliser].Apply(Amount: 20, Type: Fertiliser.Types.UreaN, Depth: 10)
              2016-03-31  [Fertiliser].Apply(Amount: 20, Type: Fertiliser.Types.UreaN, Depth: 10)
              2016-05-04  [Fertiliser].Apply(Amount: 20, Type: Fertiliser.Types.UreaN, Depth: 10)
              2016-08-30  [Fertiliser].Apply(Amount: 20, Type: Fertiliser.Types.UreaN, Depth: 10)
              2016-10-03  [Fertiliser].Apply(Amount: 20, Type: Fertiliser.Types.UreaN, Depth: 10)
              2016-10-28  [Fertiliser].Apply(Amount: 20, Type: Fertiliser.Types.UreaN, Depth: 10)
            Operations 350
              2014-10-08  [Fertiliser].Apply(Amount: 35, Type: Fertiliser.Types.UreaN, Depth: 10)
              2014-10-30  [Fertiliser].Apply(Amount: 35, Type: Fertiliser.Types.UreaN, Depth: 10)
              2014-11-25  [Fertiliser].Apply(Amount: 35, Type: Fertiliser.Types.UreaN, Depth: 10)
              2014-12-17  [Fertiliser].Apply(Amount: 35, Type: Fertiliser.Types.UreaN, Depth: 10)
              2015-01-15  [Fertiliser].Apply(Amount: 35, Type: Fertiliser.Types.UreaN, Depth: 10)
              2015-02-11  [Fertiliser].Apply(Amount: 35, Type: Fertiliser.Types.UreaN, Depth: 10)
              2015-03-10  [Fertiliser].Apply(Amount: 35, Type: Fertiliser.Types.UreaN, Depth: 10)
              2015-04-10  [Fertiliser].Apply(Amount: 35, Type: Fertiliser.Types.UreaN, Depth: 10)
              2015-05-19  [Fertiliser].Apply(Amount: 35, Type: Fertiliser.Types.UreaN, Depth: 10)
              2015-09-02  [Fertiliser].Apply(Amount: 35, Type: Fertiliser.Types.UreaN, Depth: 10)
              2015-10-06  [Fertiliser].Apply(Amount: 35, Type: Fertiliser.Types.UreaN, Depth: 10)
              2015-11-06  [Fertiliser].Apply(Amount: 35, Type: Fertiliser.Types.UreaN, Depth: 10)
              2015-12-07  [Fertiliser].Apply(Amount: 35, Type: Fertiliser.Types.UreaN, Depth: 10)
              2016-01-07  [Fertiliser].Apply(Amount: 35, Type: Fertiliser.Types.UreaN, Depth: 10)
              2016-02-04  [Fertiliser].Apply(Amount: 35, Type: Fertiliser.Types.UreaN, Depth: 10)
              2016-03-04  [Fertiliser].Apply(Amount: 35, Type: Fertiliser.Types.UreaN, Depth: 10)
              2016-03-31  [Fertiliser].Apply(Amount: 35, Type: Fertiliser.Types.UreaN, Depth: 10)
              2016-05-04  [Fertiliser].Apply(Amount: 35, Type: Fertiliser.Types.UreaN, Depth: 10)
              2016-08-30  [Fertiliser].Apply(Amount: 35, Type: Fertiliser.Types.UreaN, Depth: 10)
              2016-10-03  [Fertiliser].Apply(Amount: 35, Type: Fertiliser.Types.UreaN, Depth: 10)
              2016-10-28  [Fertiliser].Apply(Amount: 35, Type: Fertiliser.Types.UreaN, Depth: 10)
            Operations 500
              2014-10-08  [Fertiliser].Apply(Amount: 50, Type: Fertiliser.Types.UreaN, Depth: 10)
              2014-10-30  [Fertiliser].Apply(Amount: 50, Type: Fertiliser.Types.UreaN, Depth: 10)
              2014-11-25  [Fertiliser].Apply(Amount: 50, Type: Fertiliser.Types.UreaN, Depth: 10)
              2014-12-17  [Fertiliser].Apply(Amount: 50, Type: Fertiliser.Types.UreaN, Depth: 10)
              2015-01-15  [Fertiliser].Apply(Amount: 50, Type: Fertiliser.Types.UreaN, Depth: 10)
              2015-02-11  [Fertiliser].Apply(Amount: 50, Type: Fertiliser.Types.UreaN, Depth: 10)
              2015-03-10  [Fertiliser].Apply(Amount: 50, Type: Fertiliser.Types.UreaN, Depth: 10)
              2015-04-10  [Fertiliser].Apply(Amount: 50, Type: Fertiliser.Types.UreaN, Depth: 10)
              2015-05-19  [Fertiliser].Apply(Amount: 50, Type: Fertiliser.Types.UreaN, Depth: 10)
              2015-09-02  [Fertiliser].Apply(Amount: 50, Type: Fertiliser.Types.UreaN, Depth: 10)
              2015-10-06  [Fertiliser].Apply(Amount: 50, Type: Fertiliser.Types.UreaN, Depth: 10)
              2015-11-06  [Fertiliser].Apply(Amount: 50, Type: Fertiliser.Types.UreaN, Depth: 10)
              2015-12-07  [Fertiliser].Apply(Amount: 50, Type: Fertiliser.Types.UreaN, Depth: 10)
              2016-01-07  [Fertiliser].Apply(Amount: 50, Type: Fertiliser.Types.UreaN, Depth: 10)
              2016-02-04  [Fertiliser].Apply(Amount: 50, Type: Fertiliser.Types.UreaN, Depth: 10)
              2016-03-04  [Fertiliser].Apply(Amount: 50, Type: Fertiliser.Types.UreaN, Depth: 10)
              2016-03-31  [Fertiliser].Apply(Amount: 50, Type: Fertiliser.Types.UreaN, Depth: 10)
              2016-05-04  [Fertiliser].Apply(Amount: 50, Type: Fertiliser.Types.UreaN, Depth: 10)
              2016-08-30  [Fertiliser].Apply(Amount: 50, Type: Fertiliser.Types.UreaN, Depth: 10)
              2016-10-03  [Fertiliser].Apply(Amount: 50, Type: Fertiliser.Types.UreaN, Depth: 10)
              2016-10-28  [Fertiliser].Apply(Amount: 50, Type: Fertiliser.Types.UreaN, Depth: 10)
        Simulation FRNLLincoln
          Clock: StartDate=2014-01-01; EndDate=2016-05-31
          Weather: FileName=Lincoln-Broadfields.met
          Summary summaryfile
          SoilArbitrator Soil Arbitrator
          Zone Field: Area=1; Slope=0
            Folder Management
              Operations Sowing
                2014-03-20  [Chicory].Sow(population: 200, cultivar: "Puna", depth: 10, rowSpacing: 150)
              Operations IrrigationSchedule
                2014-10-31  [Irrigation].Apply(amount: 7)
                2014-11-03  [Irrigation].Apply(amount: 7)
                2014-11-05  [Irrigation].Apply(amount: 8)
                2014-11-07  [Irrigation].Apply(amount: 8)
                2014-11-10  [Irrigation].Apply(amount: 7)
                2014-11-11  [Irrigation].Apply(amount: 7)
                2014-11-12  [Irrigation].Apply(amount: 8)
                2014-11-17  [Irrigation].Apply(amount: 9)
                2014-11-18  [Irrigation].Apply(amount: 7)
                2014-11-19  [Irrigation].Apply(amount: 7)
                2014-11-24  [Irrigation].Apply(amount: 8)
                2014-11-25  [Irrigation].Apply(amount: 9)
                2014-11-27  [Irrigation].Apply(amount: 10)
                2014-12-01  [Irrigation].Apply(amount: 8)
                2014-12-02  [Irrigation].Apply(amount: 8)
                2014-12-04  [Irrigation].Apply(amount: 7)
                2014-12-08  [Irrigation].Apply(amount: 7)
                2014-12-09  [Irrigation].Apply(amount: 7)
                2014-12-12  [Irrigation].Apply(amount: 8)
                2014-12-15  [Irrigation].Apply(amount: 10)
                2014-12-17  [Irrigation].Apply(amount: 10)
                2014-12-19  [Irrigation].Apply(amount: 7)
                2014-12-20  [Irrigation].Apply(amount: 7)
                2014-12-21  [Irrigation].Apply(amount: 8)
                2014-12-22  [Irrigation].Apply(amount: 10)
                2014-12-25  [Irrigation].Apply(amount: 8)
                2014-12-26  [Irrigation].Apply(amount: 8)
                2014-12-27  [Irrigation].Apply(amount: 7)
                2014-12-28  [Irrigation].Apply(amount: 10)
                2014-12-29  [Irrigation].Apply(amount: 8)
                2014-12-30  [Irrigation].Apply(amount: 8)
                2015-01-02  [Irrigation].Apply(amount: 7)
                2015-01-05  [Irrigation].Apply(amount: 10)
                2015-01-08  [Irrigation].Apply(amount: 8)
                2015-01-09  [Irrigation].Apply(amount: 9)
                2015-01-12  [Irrigation].Apply(amount: 7)
                2015-01-13  [Irrigation].Apply(amount: 7)
                2015-01-16  [Irrigation].Apply(amount: 8)
                2015-01-19  [Irrigation].Apply(amount: 7)
                2015-01-20  [Irrigation].Apply(amount: 7)
                2015-01-21  [Irrigation].Apply(amount: 8)
                2015-01-26  [Irrigation].Apply(amount: 10)
                2015-01-27  [Irrigation].Apply(amount: 10)
                2015-01-29  [Irrigation].Apply(amount: 8)
                2015-02-02  [Irrigation].Apply(amount: 10)
                2015-02-04  [Irrigation].Apply(amount: 8)
                2015-02-05  [Irrigation].Apply(amount: 7)
                2015-02-09  [Irrigation].Apply(amount: 8)
                2015-02-11  [Irrigation].Apply(amount: 7)
                2015-02-12  [Irrigation].Apply(amount: 10)
                2015-02-16  [Irrigation].Apply(amount: 10)
                2015-02-17  [Irrigation].Apply(amount: 10)
                2015-02-18  [Irrigation].Apply(amount: 8)
                2015-02-24  [Irrigation].Apply(amount: 10)
                2015-02-26  [Irrigation].Apply(amount: 7)
                2015-02-27  [Irrigation].Apply(amount: 8)
                2015-03-02  [Irrigation].Apply(amount: 7)
                2015-03-03  [Irrigation].Apply(amount: 7)
                2015-03-05  [Irrigation].Apply(amount: 8)
                2015-03-10  [Irrigation].Apply(amount: 8)
                2015-03-12  [Irrigation].Apply(amount: 9)
                2015-03-13  [Irrigation].Apply(amount: 7)
                2015-03-16  [Irrigation].Apply(amount: 10)
                2015-03-19  [Irrigation].Apply(amount: 9)
                2015-03-20  [Irrigation].Apply(amount: 8)
                2015-03-23  [Irrigation].Apply(amount: 9)
                2015-03-24  [Irrigation].Apply(amount: 7)
                2015-03-26  [Irrigation].Apply(amount: 10)
                2015-03-30  [Irrigation].Apply(amount: 7)
                2015-04-02  [Irrigation].Apply(amount: 10)
                2015-04-03  [Irrigation].Apply(amount: 8)
                2015-04-06  [Irrigation].Apply(amount: 7)
                2015-04-08  [Irrigation].Apply(amount: 10)
                2015-04-17  [Irrigation].Apply(amount: 10)
                2015-05-20  [Irrigation].Apply(amount: 10)
                2015-06-09  [Irrigation].Apply(amount: 10)
                2015-09-09  [Irrigation].Apply(amount: 10)
                2015-09-30  [Irrigation].Apply(amount: 10)
                2015-10-02  [Irrigation].Apply(amount: 8)
                2015-10-06  [Irrigation].Apply(amount: 10)
                2015-10-09  [Irrigation].Apply(amount: 10)
                2015-10-12  [Irrigation].Apply(amount: 8)
                2015-10-13  [Irrigation].Apply(amount: 7)
                2015-10-16  [Irrigation].Apply(amount: 10)
                2015-10-20  [Irrigation].Apply(amount: 10)
                2015-10-21  [Irrigation].Apply(amount: 8)
                2015-10-23  [Irrigation].Apply(amount: 7)
                2015-10-26  [Irrigation].Apply(amount: 7)
                2015-10-27  [Irrigation].Apply(amount: 9)
                2015-11-02  [Irrigation].Apply(amount: 10)
                2015-11-03  [Irrigation].Apply(amount: 8)
                2015-11-04  [Irrigation].Apply(amount: 9)
                2015-11-06  [Irrigation].Apply(amount: 9)
                2015-11-09  [Irrigation].Apply(amount: 10)
                2015-11-11  [Irrigation].Apply(amount: 7)
                2015-11-16  [Irrigation].Apply(amount: 10)
                2015-11-18  [Irrigation].Apply(amount: 9)
                2015-11-20  [Irrigation].Apply(amount: 7)
                2015-11-23  [Irrigation].Apply(amount: 10)
                2015-11-24  [Irrigation].Apply(amount: 8)
                2015-11-25  [Irrigation].Apply(amount: 7)
                2015-11-27  [Irrigation].Apply(amount: 9)
                2015-11-30  [Irrigation].Apply(amount: 7)
                2015-12-01  [Irrigation].Apply(amount: 7)
                2015-12-04  [Irrigation].Apply(amount: 9)
                2015-12-07  [Irrigation].Apply(amount: 10)
                2015-12-09  [Irrigation].Apply(amount: 9)
                2015-12-10  [Irrigation].Apply(amount: 9)
                2015-12-22  [Irrigation].Apply(amount: 8)
                2015-12-24  [Irrigation].Apply(amount: 9)
                2015-12-26  [Irrigation].Apply(amount: 8)
                2015-12-29  [Irrigation].Apply(amount: 7)
                2015-12-31  [Irrigation].Apply(amount: 7)
                2016-01-01  [Irrigation].Apply(amount: 10)
                2016-01-07  [Irrigation].Apply(amount: 10)
                2016-01-09  [Irrigation].Apply(amount: 7)
                2016-01-11  [Irrigation].Apply(amount: 7)
                2016-01-12  [Irrigation].Apply(amount: 7)
                2016-01-13  [Irrigation].Apply(amount: 9)
                2016-01-15  [Irrigation].Apply(amount: 10)
                2016-01-21  [Irrigation].Apply(amount: 7)
                2016-01-25  [Irrigation].Apply(amount: 8)
                2016-01-30  [Irrigation].Apply(amount: 7)
                2016-02-02  [Irrigation].Apply(amount: 10)
                2016-02-03  [Irrigation].Apply(amount: 10)
                2016-02-05  [Irrigation].Apply(amount: 9)
                2016-02-08  [Irrigation].Apply(amount: 10)
                2016-02-11  [Irrigation].Apply(amount: 10)
                2016-02-12  [Irrigation].Apply(amount: 7)
                2016-02-15  [Irrigation].Apply(amount: 8)
                2016-02-16  [Irrigation].Apply(amount: 8)
                2016-02-22  [Irrigation].Apply(amount: 7)
                2016-02-23  [Irrigation].Apply(amount: 7)
                2016-02-25  [Irrigation].Apply(amount: 7)
                2016-02-26  [Irrigation].Apply(amount: 7)
                2016-03-01  [Irrigation].Apply(amount: 7)
                2016-03-02  [Irrigation].Apply(amount: 8)
                2016-03-04  [Irrigation].Apply(amount: 10)
                2016-03-07  [Irrigation].Apply(amount: 9)
                2016-03-08  [Irrigation].Apply(amount: 4)
                2016-03-10  [Irrigation].Apply(amount: 8)
                2016-03-14  [Irrigation].Apply(amount: 8)
                2016-03-15  [Irrigation].Apply(amount: 10)
                2016-03-18  [Irrigation].Apply(amount: 9)
                2016-03-21  [Irrigation].Apply(amount: 10)
                2016-03-22  [Irrigation].Apply(amount: 9)
                2016-03-23  [Irrigation].Apply(amount: 9)
                2016-03-28  [Irrigation].Apply(amount: 8)
                2016-04-02  [Irrigation].Apply(amount: 10)
                2016-04-08  [Irrigation].Apply(amount: 10)
                2016-05-04  [Irrigation].Apply(amount: 10)
                2016-08-31  [Irrigation].Apply(amount: 10)
                2016-10-05  [Irrigation].Apply(amount: 10)
                2016-10-18  [Irrigation].Apply(amount: 10)
                2016-10-26  [Irrigation].Apply(amount: 10)
              Operations NRate
              Manager Defoliate: same as Validation.New Zealand.ScottFarm.ScottFarmC.ScottFarmC17a.Field.Management.Defoliate
              Operations DefoliationSchedule
                2014-10-08  [Defoliate].Script.Defoliate(defoliationType: "Cut", amountDM: 60, amountType: "ResidualDM", duration: 1)
                2014-10-30  [Defoliate].Script.Defoliate(defoliationType: "Cut", amountDM: 40, amountType: "ResidualDM", duration: 1)
                2014-11-25  [Defoliate].Script.Defoliate(defoliationType: "Cut", amountDM: 40, amountType: "ResidualDM", duration: 1)
                2014-12-17  [Defoliate].Script.Defoliate(defoliationType: "Cut", amountDM: 40, amountType: "ResidualDM", duration: 1)
                2015-01-15  [Defoliate].Script.Defoliate(defoliationType: "Cut", amountDM: 40, amountType: "ResidualDM", duration: 1)
                2015-02-11  [Defoliate].Script.Defoliate(defoliationType: "Cut", amountDM: 40, amountType: "ResidualDM", duration: 1)
                2015-03-10  [Defoliate].Script.Defoliate(defoliationType: "Cut", amountDM: 40, amountType: "ResidualDM", duration: 1)
                2015-04-13  [Defoliate].Script.Defoliate(defoliationType: "Cut", amountDM: 40, amountType: "ResidualDM", duration: 1)
                2015-05-19  [Defoliate].Script.Defoliate(defoliationType: "Cut", amountDM: 40, amountType: "ResidualDM", duration: 1)
                2015-09-02  [Defoliate].Script.Defoliate(defoliationType: "Cut", amountDM: 40, amountType: "ResidualDM", duration: 1)
                2015-10-06  [Defoliate].Script.Defoliate(defoliationType: "Cut", amountDM: 40, amountType: "ResidualDM", duration: 1)
                2015-11-06  [Defoliate].Script.Defoliate(defoliationType: "Cut", amountDM: 40, amountType: "ResidualDM", duration: 1)
                2015-12-07  [Defoliate].Script.Defoliate(defoliationType: "Cut", amountDM: 40, amountType: "ResidualDM", duration: 1)
                2016-01-07  [Defoliate].Script.Defoliate(defoliationType: "Cut", amountDM: 40, amountType: "ResidualDM", duration: 1)
                2016-02-04  [Defoliate].Script.Defoliate(defoliationType: "Cut", amountDM: 40, amountType: "ResidualDM", duration: 1)
                2016-03-04  [Defoliate].Script.Defoliate(defoliationType: "Cut", amountDM: 40, amountType: "ResidualDM", duration: 1)
                2016-03-31  [Defoliate].Script.Defoliate(defoliationType: "Cut", amountDM: 40, amountType: "ResidualDM", duration: 1)
                2016-05-04  [Defoliate].Script.Defoliate(defoliationType: "Cut", amountDM: 40, amountType: "ResidualDM", duration: 1)
                2016-08-30  [Defoliate].Script.Defoliate(defoliationType: "Cut", amountDM: 40, amountType: "ResidualDM", duration: 1)
                2016-10-03  [Defoliate].Script.Defoliate(defoliationType: "Cut", amountDM: 40, amountType: "ResidualDM", duration: 1)
                2016-10-28  [Defoliate].Script.Defoliate(defoliationType: "Cut", amountDM: 40, amountType: "ResidualDM", duration: 1)
              Manager ExtraVariables
                script: same as in Validation.New Zealand.ScottFarm.ScottFarmC.ScottFarmC17a.Field.Management.ExtraVariables
            MicroClimate: a_interception=0; b_interception=1; c_interception=0; d_interception=0; soil_albedo=0.23; sun_angle=15; soil_heat_flux_fraction=0.4; night_interception_fraction=0.5; refheight=2; albedo=0.15; emissivity=0.96; RadIntTotal=0
            Irrigation
            Fertiliser
            SurfaceOrganicMatter: same as Validation.New Zealand.ScottFarm.ScottFarmFD902.FD902.Field.SurfaceOrganicMatter
            Soil TempletonPaparua: SoilType=Udic Haplustept (US),  Immature Pallic Soil (NZ); LocalName=Templeton Fine Sandy Loam; Site=LURDF; NearestTown=Lincoln; Region=Canterbury; Country=New Zealand; Latitude=0; Longitude=0; DataSource=Adapted based on data from the NZ Natioanl Soils Database
              Comments=Different references name the soil at the site as either Templeton or Paparua (very similar soils)
              Analysis: PHUnits=Water; BoronUnits=HotWater
                Thickness  Rocks  PH  CEC   ParticleSizeSand  ParticleSizeSilt  ParticleSizeClay
                150        0      6   13.9  17.4              60.9              21.8
                150        0      6   9.9   30.3              53.7              16
                200        0      6   10.1  21                59.5              19.5
                250        0      6   7.4   37                54.6              8.3
                250        0      6   7.1   43.6              46.9              9.5
                500        0      6   7.6   24.2              59.3              16.6
              Water
                Thickness  BD    AirDry  LL15   DUL    SAT    KS
                150        1.35  0.057   0.17   0.351  0.439  4641.312
                150        1.43  0.141   0.177  0.325  0.409  1594.057
                200        1.63  0.186   0.186  0.328  0.362  75.525
                250        1.57  0.132   0.132  0.257  0.358  2914.115
                250        1.52  0.116   0.116  0.242  0.365  2476.033
                500        1.41  0.138   0.138  0.276  0.39   2859.216
                SoilCrop ChicorySoil: LL=[0.17, 0.177, 0.186, 0.132, 0.116, 0.138]; KL=[0.12, 0.11, 0.08, 0.03, 0.01, 0.01]; XF=[1, 1, 1, 1, 1, 1]
              SoilWater: SummerDate=1-Nov; SummerU=6; SummerCona=3.5; WinterDate=1-apr; WinterU=2; WinterCona=2; DiffusConst=88; DiffusSlope=35; Salb=0.13; CN2Bare=73; CNRed=20; CNCov=0.8; max_pond=0; Thickness=[150, 150, 200, 250, 250, 500]; SWCON=[0.5, 0.46, 0.27, 0.5, 0.49, 0.48]; residueinterception=0
              SoilNitrogen: fom_type=[default, manure, mucuna, lablab, shemp, stable]; fract_carb=[0.2, 0.3, 0.54, 0.57, 0.45, 0]; fract_cell=[0.7, 0.3, 0.37, 0.37, 0.47, 0.1]; fract_lign=[0.1, 0.4, 0.09, 0.06, 0.08, 0.9]; wfpsN2N2O_x=[22, 88]; wfpsN2N2O_y=[0.1, 1]
              SoilOrganicMatter: RootCN=40; RootWt=1000; SoilCN=11.3; EnrACoeff=7.4; EnrBCoeff=0.2; OCUnits=Total
                Thickness  OC    FBiom  FInert
                150        2.6   0.105  0.4
                150        1.01  0.075  0.65
                200        0.4   0.02   0.81
                250        0.19  0.01   0.87
                250        0.22  0.008  0.95
                500        0.18  0.005  0.99
              InitialWater Initial water: PercentMethod=FilledFromTop; FractionFull=0.99
              Sample Initial nitrogen: NO3Units=kgha; NH4Units=kgha; SWUnits=Volumetric; OCUnits=Total; PHUnits=Water
                Thickness  NO3      NH4
                150        16       1
                150        15       1
                450        17.9625  1
                250        9.5      1
                500        8.46     1
              CERESSoilTemperature
            Plant Chicory: CropType=Chicory
            Report: EventNames=[Clock].DoReport
            SoluteManager
      Experiment FRNLRuakura
        Memo
          This simulation setup was based on field trials performed at DairyNZ's Scott Farm, in Ruakura, New Zealand, between 2014 and 2016.  The experiment was part of the FRNL (Forages for Reduced Nitrogen Leaching) program and the data is basically unpublished (references will be added when they become available).
          The experiment consisted of six fertiliser treatments (N rates of 0, 50, 100, 200, 350 and 500 kg/ha/yr) in three replicates, and measurements comprised yield and quality indicators (here N content is used).
          Observed data supplied by Grant Edwards, Lincoln University.

          The soil at the experimental site was a Horotiu silt loam (an Orthic Allophanic soil; USDA: Typic Udivitrand), the parameters required were inferred using data from the New Zealand National Soils Database (Landcare Research).
          Weather data was obtained from nearby Ruakura weather station (NIWA).
        Factors
          Factor NRate: Specifications=[NRate]
            Operations 0
              2014-10-13  [Fertiliser].Apply(Amount: 26.4, Type: Fertiliser.Types.UreaN, Depth: 10)
            Operations 50
              2014-10-13  [Fertiliser].Apply(Amount: 26.4, Type: Fertiliser.Types.UreaN, Depth: 10)
              2014-12-23  [Fertiliser].Apply(Amount: 5, Type: Fertiliser.Types.UreaN, Depth: 10)
              2015-01-19  [Fertiliser].Apply(Amount: 5, Type: Fertiliser.Types.UreaN, Depth: 10)
              2015-02-04  [Fertiliser].Apply(Amount: 5, Type: Fertiliser.Types.UreaN, Depth: 10)
              2015-03-03  [Fertiliser].Apply(Amount: 5, Type: Fertiliser.Types.UreaN, Depth: 10)
              2015-03-31  [Fertiliser].Apply(Amount: 5, Type: Fertiliser.Types.UreaN, Depth: 10)
              2015-05-14  [Fertiliser].Apply(Amount: 5, Type: Fertiliser.Types.UreaN, Depth: 10)
              2015-10-09  [Fertiliser].Apply(Amount: 5, Type: Fertiliser.Types.UreaN, Depth: 10)
              2015-10-19  [Fertiliser].Apply(Amount: 10, Type: Fertiliser.Types.UreaN, Depth: 10)
              2015-11-13  [Fertiliser].Apply(Amount: 5, Type: Fertiliser.Types.UreaN, Depth: 10)
              2015-12-10  [Fertiliser].Apply(Amount: 5, Type: Fertiliser.Types.UreaN, Depth: 10)
              2016-01-14  [Fertiliser].Apply(Amount: 5, Type: Fertiliser.Types.UreaN, Depth: 10)
              2016-02-23  [Fertiliser].Apply(Amount: 5, Type: Fertiliser.Types.UreaN, Depth: 10)
              2016-04-01  [Fertiliser].Apply(Amount: 5, Type: Fertiliser.Types.UreaN, Depth: 10)
              2016-05-06  [Fertiliser].Apply(Amount: 5, Type: Fertiliser.Types.UreaN, Depth: 10)
            Operations 100
              2014-10-13  [Fertiliser].Apply(Amount: 26.4, Type: Fertiliser.Types.UreaN, Depth: 10)
              2014-12-23  [Fertiliser].Apply(Amount: 10, Type: Fertiliser.Types.UreaN, Depth: 10)
              2015-01-19  [Fertiliser].Apply(Amount: 10, Type: Fertiliser.Types.UreaN, Depth: 10)
              2015-02-04  [Fertiliser].Apply(Amount: 10, Type: Fertiliser.Types.UreaN, Depth: 10)
              2015-03-03  [Fertiliser].Apply(Amount: 10, Type: Fertiliser.Types.UreaN, Depth: 10)
              2015-03-31  [Fertiliser].Apply(Amount: 10, Type: Fertiliser.Types.UreaN, Depth: 10)
              2015-05-14  [Fertiliser].Apply(Amount: 10, Type: Fertiliser.Types.UreaN, Depth: 10)
              2015-10-09  [Fertiliser].Apply(Amount: 10, Type: Fertiliser.Types.UreaN, Depth: 10)
              2015-10-19  [Fertiliser].Apply(Amount: 20, Type: Fertiliser.Types.UreaN, Depth: 10)
              2015-11-13  [Fertiliser].Apply(Amount: 10, Type: Fertiliser.Types.UreaN, Depth: 10)
              2015-12-10  [Fertiliser].Apply(Amount: 10, Type: Fertiliser.Types.UreaN, Depth: 10)
              2016-01-14  [Fertiliser].Apply(Amount: 10, Type: Fertiliser.Types.UreaN, Depth: 10)
              2016-02-23  [Fertiliser].Apply(Amount: 10, Type: Fertiliser.Types.UreaN, Depth: 10)
              2016-04-01  [Fertiliser].Apply(Amount: 10, Type: Fertiliser.Types.UreaN, Depth: 10)
              2016-05-06  [Fertiliser].Apply(Amount: 10, Type: Fertiliser.Types.UreaN, Depth: 10)
            Operations 200
              2014-10-13  [Fertiliser].Apply(Amount: 26.4, Type: Fertiliser.Types.UreaN, Depth: 10)
              2014-12-23  [Fertiliser].Apply(Amount: 20, Type: Fertiliser.Types.UreaN, Depth: 10)
              2015-01-19  [Fertiliser].Apply(Amount: 20, Type: Fertiliser.Types.UreaN, Depth: 10)
              2015-02-04  [Fertiliser].Apply(Amount: 20, Type: Fertiliser.Types.UreaN, Depth: 10)
              2015-03-03  [Fertiliser].Apply(Amount: 20, Type: Fertiliser.Types.UreaN, Depth: 10)
              2015-03-31  [Fertiliser].Apply(Amount: 20, Type: Fertiliser.Types.UreaN, Depth: 10)
              2015-05-14  [Fertiliser].Apply(Amount: 20, Type: Fertiliser.Types.UreaN, Depth: 10)
              2015-10-09  [Fertiliser].Apply(Amount: 20, Type: Fertiliser.Types.UreaN, Depth: 10)
              2015-10-19  [Fertiliser].Apply(Amount: 40, Type: Fertiliser.Types.UreaN, Depth: 10)
              2015-11-13  [Fertiliser].Apply(Amount: 20, Type: Fertiliser.Types.UreaN, Depth: 10)
              2015-12-10  [Fertiliser].Apply(Amount: 20, Type: Fertiliser.Types.UreaN, Depth: 10)
              2016-01-14  [Fertiliser].Apply(Amount: 20, Type: Fertiliser.Types.UreaN, Depth: 10)
              2016-02-23  [Fertiliser].Apply(Amount: 20, Type: Fertiliser.Types.UreaN, Depth: 10)
              2016-04-01  [Fertiliser].Apply(Amount: 20, Type: Fertiliser.Types.UreaN, Depth: 10)
              2016-05-06  [Fertiliser].Apply(Amount: 20, Type: Fertiliser.Types.UreaN, Depth: 10)
            Operations 350
              2014-10-13  [Fertiliser].Apply(Amount: 26.4, Type: Fertiliser.Types.UreaN, Depth: 10)
              2014-12-23  [Fertiliser].Apply(Amount: 35, Type: Fertiliser.Types.UreaN, Depth: 10)
              2015-01-19  [Fertiliser].Apply(Amount: 35, Type: Fertiliser.Types.UreaN, Depth: 10)
              2015-02-04  [Fertiliser].Apply(Amount: 35, Type: Fertiliser.Types.UreaN, Depth: 10)
              2015-03-03  [Fertiliser].Apply(Amount: 35, Type: Fertiliser.Types.UreaN, Depth: 10)
              2015-03-31  [Fertiliser].Apply(Amount: 35, Type: Fertiliser.Types.UreaN, Depth: 10)
              2015-05-14  [Fertiliser].Apply(Amount: 35, Type: Fertiliser.Types.UreaN, Depth: 10)
              2015-10-09  [Fertiliser].Apply(Amount: 35, Type: Fertiliser.Types.UreaN, Depth: 10)
              2015-10-19  [Fertiliser].Apply(Amount: 70, Type: Fertiliser.Types.UreaN, Depth: 10)
              2015-11-13  [Fertiliser].Apply(Amount: 35, Type: Fertiliser.Types.UreaN, Depth: 10)
              2015-12-10  [Fertiliser].Apply(Amount: 35, Type: Fertiliser.Types.UreaN, Depth: 10)
              2016-01-14  [Fertiliser].Apply(Amount: 35, Type: Fertiliser.Types.UreaN, Depth: 10)
              2016-02-23  [Fertiliser].Apply(Amount: 35, Type: Fertiliser.Types.UreaN, Depth: 10)
              2016-04-01  [Fertiliser].Apply(Amount: 35, Type: Fertiliser.Types.UreaN, Depth: 10)
              2016-05-06  [Fertiliser].Apply(Amount: 35, Type: Fertiliser.Types.UreaN, Depth: 10)
            Operations 500
              2014-10-13  [Fertiliser].Apply(Amount: 26.4, Type: Fertiliser.Types.UreaN, Depth: 10)
              2014-12-23  [Fertiliser].Apply(Amount: 50, Type: Fertiliser.Types.UreaN, Depth: 10)
              2015-01-19  [Fertiliser].Apply(Amount: 50, Type: Fertiliser.Types.UreaN, Depth: 10)
              2015-02-04  [Fertiliser].Apply(Amount: 50, Type: Fertiliser.Types.UreaN, Depth: 10)
              2015-03-03  [Fertiliser].Apply(Amount: 50, Type: Fertiliser.Types.UreaN, Depth: 10)
              2015-03-31  [Fertiliser].Apply(Amount: 50, Type: Fertiliser.Types.UreaN, Depth: 10)
              2015-05-14  [Fertiliser].Apply(Amount: 50, Type: Fertiliser.Types.UreaN, Depth: 10)
              2015-10-09  [Fertiliser].Apply(Amount: 50, Type: Fertiliser.Types.UreaN, Depth: 10)
              2015-10-19  [Fertiliser].Apply(Amount: 100, Type: Fertiliser.Types.UreaN, Depth: 10)
              2015-11-13  [Fertiliser].Apply(Amount: 50, Type: Fertiliser.Types.UreaN, Depth: 10)
              2015-12-10  [Fertiliser].Apply(Amount: 50, Type: Fertiliser.Types.UreaN, Depth: 10)
              2016-01-14  [Fertiliser].Apply(Amount: 50, Type: Fertiliser.Types.UreaN, Depth: 10)
              2016-02-23  [Fertiliser].Apply(Amount: 50, Type: Fertiliser.Types.UreaN, Depth: 10)
              2016-04-01  [Fertiliser].Apply(Amount: 50, Type: Fertiliser.Types.UreaN, Depth: 10)
              2016-05-06  [Fertiliser].Apply(Amount: 50, Type: Fertiliser.Types.UreaN, Depth: 10)
        Simulation FRNLRuakura
          Clock: StartDate=2014-06-01; EndDate=2016-05-31
          Weather: FileName=Ruakura.met
          Summary summaryfile
          SoilArbitrator Soil Arbitrator
          Zone Field: Area=1; Slope=0
            Folder Management
              Operations Sowing
                2014-10-24  [Chicory].Sow(population: 200, cultivar: "Puna", depth: 10, rowSpacing: 150)
              Operations NRate
              Manager Defoliate: same as Validation.New Zealand.ScottFarm.ScottFarmC.ScottFarmC17a.Field.Management.Defoliate
              Operations DefoliationSchedule
                2015-01-13  [Defoliate].Script.Defoliate(defoliationType: "Cut", amountDM: 40, amountType: "ResidualDM", duration: 1)
                2015-02-03  [Defoliate].Script.Defoliate(defoliationType: "Cut", amountDM: 40, amountType: "ResidualDM", duration: 1)
                2015-03-02  [Defoliate].Script.Defoliate(defoliationType: "Cut", amountDM: 40, amountType: "ResidualDM", duration: 1)
                2015-03-30  [Defoliate].Script.Defoliate(defoliationType: "Cut", amountDM: 40, amountType: "ResidualDM", duration: 1)
                2015-05-13  [Defoliate].Script.Defoliate(defoliationType: "Cut", amountDM: 40, amountType: "ResidualDM", duration: 1)
                2015-10-07  [Defoliate].Script.Defoliate(defoliationType: "Cut", amountDM: 40, amountType: "ResidualDM", duration: 1)
                2015-11-09  [Defoliate].Script.Defoliate(defoliationType: "Cut", amountDM: 40, amountType: "ResidualDM", duration: 1)
                2015-12-09  [Defoliate].Script.Defoliate(defoliationType: "Cut", amountDM: 40, amountType: "ResidualDM", duration: 1)
                2016-01-13  [Defoliate].Script.Defoliate(defoliationType: "Cut", amountDM: 40, amountType: "ResidualDM", duration: 1)
                2016-02-22  [Defoliate].Script.Defoliate(defoliationType: "Cut", amountDM: 25, amountType: "ResidualDM", duration: 1)
                2016-03-30  [Defoliate].Script.Defoliate(defoliationType: "Cut", amountDM: 40, amountType: "ResidualDM", duration: 1)
                2016-05-04  [Defoliate].Script.Defoliate(defoliationType: "Cut", amountDM: 40, amountType: "ResidualDM", duration: 1)
              Manager ExtraVariables
                script: same as in Validation.New Zealand.ScottFarm.ScottFarmC.ScottFarmC17a.Field.Management.ExtraVariables
            MicroClimate: a_interception=0; b_interception=1; c_interception=0; d_interception=0; soil_albedo=0.23; sun_angle=15; soil_heat_flux_fraction=0.4; night_interception_fraction=0.5; refheight=2; albedo=0.15; emissivity=0.96; RadIntTotal=0
            Irrigation
            Fertiliser
            SurfaceOrganicMatter: same as Validation.New Zealand.ScottFarm.ScottFarmFD902.FD902.Field.SurfaceOrganicMatter
            Soil HorotiuSoil: SoilType=Typic Udivitrand (US), Typic Orthic Allophanic Soil (NZ); LocalName=Horotiu silt loam; Site=Ruakura; NearestTown=Hamilton; Region=Waikato; Country=New Zealand; Latitude=0; Longitude=0; DataSource=Based primarily on data from Close et al, 2003
              Analysis: same as Validation.New Zealand.ScottFarm.ScottFarmC.ScottFarmC17a.Field.HorotiuSoil.Analysis
              Water
                Thickness  BD    AirDry  LL15   DUL    SAT    KS
                200        0.88  0.114   0.228  0.373  0.581  553
                200        0.85  0.209   0.22   0.34   0.609  5083
                130        1.03  0.182   0.182  0.323  0.54   8353
                140        1.11  0.15    0.15   0.282  0.5    13589
                380        1.11  0.142   0.142  0.2    0.5    38963
                230        1.03  0.103   0.103  0.16   0.446  45280
                SoilCrop ChicorySoil: LL=[0.23, 0.22, 0.18, 0.15, 0.14, 0.1]; KL=[0.1, 0.08, 0.05, 0.02, 0.01, 0.01]; XF=[1, 1, 1, 1, 1, 1]
              SoilWater: same as Validation.New Zealand.ScottFarm.ScottFarmC.ScottFarmC17a.Field.HorotiuSoil.SoilWater
              SoilNitrogen: fom_type=[default, manure, mucuna, lablab, shemp, stable]; fract_carb=[0.2, 0.3, 0.54, 0.57, 0.45, 0]; fract_cell=[0.7, 0.3, 0.37, 0.37, 0.47, 0.1]; fract_lign=[0.1, 0.4, 0.09, 0.06, 0.08, 0.9]; wfpsN2N2O_x=[22, 88]; wfpsN2N2O_y=[0.1, 1]
              SoilOrganicMatter: same as Validation.New Zealand.ScottFarm.ScottFarmC.ScottFarmC17a.Field.HorotiuSoil.SoilOrganicMatter
              InitialWater Initial water: PercentMethod=EvenlyDistributed; FractionFull=0.9
              Sample Initial nitrogen: NO3Units=kgha; NH4Units=kgha; SWUnits=Volumetric; OCUnits=Total; PHUnits=Water
                Thickness  NO3    NH4
                200        26.4   0.88
                200        17     0.34
                600        32.78  0.609708
                500        5.19   0.48267
              CERESSoilTemperature
            Plant Chicory: CropType=Chicory
            Report: EventNames=[Clock].DoReport
            SoluteManager
      Memo SubTitle
        ### All data from New Zealand
    Folder USA
      Experiment AFSRC_01
        Memo
          This simulation was adapted from a defoliation trial in West Virginia, USA, conducted from 1994 to 1996 at the Appalachian Farming Systems Research Center.  The study investigated production and the nutritive value of chicory swards (cultivar '*Puna*' - among other species) as a function of clipping frequency (3- and 6-wk intervals).  Each treatment was replicated three times on an upland site of Dekalb soil series (loamy-skeletal, mixed, subactive, mesic Typic Dystrochrept).  Modest rates of N, P, and K were applied annually.  Herbage mass, botanical composition, in vitro organic matter disappearance (IVOMD), and crude protein (CP) were determined.
          Met data for nearby location was obtained from NOAA.  The data set was largely complete except for solar radiation, which was added from an alternative interpolated set for this location, also from NOAA.
          Information to assemble the soil data was based on a Ramsey series obtained from USGS.

          References:
          Belesky, D.P.; Fedders, J.M.; Turner, K.E.; Ruckle, J.M. 1999. Productivity, botanical composition, and nutritive value of swards including forage chicory. Agronomy Journal, 91(3): 450-456.
        Factors
          Factor CutFrequency: Specifications=[Cuttings]
            Operations 3wks
              1994-04-20  [Defoliate].Script.Defoliate(defoliationType: "Cut", amountDM: 35, amountType: "ResidualDM", duration: 1)
              1994-05-12  [Defoliate].Script.Defoliate(defoliationType: "Cut", amountDM: 35, amountType: "ResidualDM", duration: 1)
              1994-06-03  [Defoliate].Script.Defoliate(defoliationType: "Cut", amountDM: 35, amountType: "ResidualDM", duration: 1)
              1994-06-23  [Defoliate].Script.Defoliate(defoliationType: "Cut", amountDM: 35, amountType: "ResidualDM", duration: 1)
              1994-07-15  [Defoliate].Script.Defoliate(defoliationType: "Cut", amountDM: 35, amountType: "ResidualDM", duration: 1)
              1994-08-06  [Defoliate].Script.Defoliate(defoliationType: "Cut", amountDM: 35, amountType: "ResidualDM", duration: 1)
              1994-08-29  [Defoliate].Script.Defoliate(defoliationType: "Cut", amountDM: 35, amountType: "ResidualDM", duration: 1)
              1994-09-23  [Defoliate].Script.Defoliate(defoliationType: "Cut", amountDM: 35, amountType: "ResidualDM", duration: 1)
              1995-04-20  [Defoliate].Script.Defoliate(defoliationType: "Cut", amountDM: 35, amountType: "ResidualDM", duration: 1)
              1995-05-12  [Defoliate].Script.Defoliate(defoliationType: "Cut", amountDM: 35, amountType: "ResidualDM", duration: 1)
              1995-06-03  [Defoliate].Script.Defoliate(defoliationType: "Cut", amountDM: 35, amountType: "ResidualDM", duration: 1)
              1995-06-23  [Defoliate].Script.Defoliate(defoliationType: "Cut", amountDM: 35, amountType: "ResidualDM", duration: 1)
              1995-07-15  [Defoliate].Script.Defoliate(defoliationType: "Cut", amountDM: 35, amountType: "ResidualDM", duration: 1)
              1995-08-06  [Defoliate].Script.Defoliate(defoliationType: "Cut", amountDM: 35, amountType: "ResidualDM", duration: 1)
              1995-08-29  [Defoliate].Script.Defoliate(defoliationType: "Cut", amountDM: 35, amountType: "ResidualDM", duration: 1)
              1995-09-23  [Defoliate].Script.Defoliate(defoliationType: "Cut", amountDM: 35, amountType: "ResidualDM", duration: 1)
            Operations 6wks
              1994-06-01  [Defoliate].Script.Defoliate(defoliationType: "Cut", amountDM: 40, amountType: "ResidualDM", duration: 1)
              1994-07-06  [Defoliate].Script.Defoliate(defoliationType: "Cut", amountDM: 40, amountType: "ResidualDM", duration: 1)
              1994-08-17  [Defoliate].Script.Defoliate(defoliationType: "Cut", amountDM: 40, amountType: "ResidualDM", duration: 1)
              1994-09-27  [Defoliate].Script.Defoliate(defoliationType: "Cut", amountDM: 40, amountType: "ResidualDM", duration: 1)
              1995-06-01  [Defoliate].Script.Defoliate(defoliationType: "Cut", amountDM: 40, amountType: "ResidualDM", duration: 1)
              1995-07-06  [Defoliate].Script.Defoliate(defoliationType: "Cut", amountDM: 40, amountType: "ResidualDM", duration: 1)
              1995-08-17  [Defoliate].Script.Defoliate(defoliationType: "Cut", amountDM: 40, amountType: "ResidualDM", duration: 1)
              1995-09-27  [Defoliate].Script.Defoliate(defoliationType: "Cut", amountDM: 40, amountType: "ResidualDM", duration: 1)
        Simulation AFSRC_01
          Clock: StartDate=1993-05-01; EndDate=1995-12-31
          Weather: FileName=Beckley.met
          Summary
          SoilArbitrator Soil Arbitrator
          Zone Field: Area=1; Slope=0
            Folder Management
              Manager ExtraVariables
```csharp
using System;
using Models.Core;
using System.Collections.Generic;
using System.Text;
using Models.Soils;
using Models.PMF;
using Models;
using System.Xml.Serialization;
using APSIM.Shared.Utilities;

namespace Models
{
	[Serializable] 
	public class Script : Model
	{
		[Link] Clock Clock;
		[Link] Soils.Soil Soil;
		[Link] Models.SurfaceOM.SurfaceOrganicMatter SOM;
		[Link] Weather Met;
		[Link] Fertiliser Fert;
		[Link] Irrigation Irrig;
		[Link] Plant Chicory;
		[Link] Zone zone;
					
		[XmlIgnore] public bool InitialDay { get; set; }
		
		[XmlIgnore] public double AccumPlantN { get; set; }
		[XmlIgnore] public double AccumMineralisation { get; set; }
		[XmlIgnore] public double AccumDenit { get; set; }
		[XmlIgnore] public double AccumFert { get; set; }
		[XmlIgnore] public double AccumLeach { get; set; }
		[XmlIgnore] public double AccumDetach { get; set; }
		[XmlIgnore] public double DeltaSoilOMN { get; set; }
		[XmlIgnore] public double DeltaSurfaceOMN { get; set; }
		[XmlIgnore] public double DeltaSoilMineralN { get; set; }
		[XmlIgnore] public double SoilNitrogenContent { get; set; }
		
		[XmlIgnore] public double AccumEO { get; set; }
		[XmlIgnore] public double AccumEP { get; set; }
		[XmlIgnore] public double AccumES { get; set; }
		[XmlIgnore] public double AccumDrainage { get; set; }
		[XmlIgnore] public double AccumRunoff { get; set; }
		[XmlIgnore] public double AccumOutflowLat { get; set; }
		[XmlIgnore] public double AccumIrrigation { get; set; }
		[XmlIgnore] public double AccumRainfall { get; set; }
		[XmlIgnore] public double SoilWaterDeficit { get; set; }
	
		[XmlIgnore] public double  InitialSoilOMN { get; set; }
		[XmlIgnore] public double  InitialSurfaceOMN { get; set; }
		[XmlIgnore] public double  InitialMineralN { get; set; }
		
		[XmlIgnore] public double SWC { get; set; }
		[XmlIgnore] public double DUL { get; set; }
		[XmlIgnore] public double OutFlowLat { get; set; }

		[XmlIgnore] public double FomN { get; set; }
		[XmlIgnore] public double BiomN { get; set; }
		[XmlIgnore] public double HumN { get; set; }
		[XmlIgnore] public double OrganicN { get; set; }
		[XmlIgnore] public double NO3N { get; set; }
		[XmlIgnore] public double NH4N { get; set; }
		[XmlIgnore] public double UreaN { get; set; }
		[XmlIgnore] public double MineralN { get; set; }
		[XmlIgnore] public double DltNMinRes { get; set; }
		[XmlIgnore] public double DltNMinTot { get; set; }
		
		[EventSubscribe("Commencing")]
		private void OnSimulationCommencing(object sender, EventArgs e)
		{
			InitialDay = true;
		}
		
		[EventSubscribe("DoManagement")]
		private void OnDoManagement(object sender, EventArgs e)
		{
			//!!!!!! Nitrogen balance components !!!!!!
			//!!!!!!^^^^^^^^^^^^^^^^^^^^^^^^^^^^^!!!!!!
			FomN = MathUtilities.Sum(Soil.SoilNitrogen.FOMN);
			HumN = MathUtilities.Sum(Soil.SoilNitrogen.HumicN);
			BiomN = MathUtilities.Sum(Soil.SoilNitrogen.MicrobialN);
			OrganicN = FomN + HumN + BiomN;
			NO3N = MathUtilities.Sum(Soil.NO3N);
			NH4N = MathUtilities.Sum(Soil.NH4N);
			UreaN = MathUtilities.Sum(Soil.SoilNitrogen.urea);
			MineralN = NO3N + NH4N + UreaN; 
			DltNMinRes = MathUtilities.Sum(Soil.SoilNitrogen.dlt_n_min_res);
			DltNMinTot = MathUtilities.Sum(Soil.SoilNitrogen.MineralisedN);
			int layers = Soil.Thickness.Length;
			if (InitialDay == true)
			{
				InitialSurfaceOMN = SOM.N;
				InitialSoilOMN = OrganicN;
				InitialMineralN = MineralN;
				InitialDay = false;
			}
			DeltaSurfaceOMN = SOM.N - InitialSurfaceOMN;
			AccumLeach = AccumLeach - Soil.SoilWater.LeachNH4 - Soil.SoilWater.LeachNO3 - Soil.SoilWater.LeachUrea; //Fails
			AccumMineralisation += MathUtilities.Sum(Soil.SoilNitrogen.MineralisedN);
			AccumDenit -= MathUtilities.Sum(Soil.SoilNitrogen.Denitrification);
			AccumPlantN -= (double)zone.Get("Chicory.Root.NUptake");
			DeltaSoilOMN = OrganicN - InitialSoilOMN;
			DeltaSoilMineralN = MineralN - InitialMineralN;
			SoilNitrogenContent = MineralN;
			
			//!!!!!! Water balance components !!!!!!
			//!!!!!!^^^^^^^^^^^^^^^^^^^^^^^^^^!!!!!!

			AccumRainfall += Met.Rain;
			//AccumEP -= (double)zone.Get("[Chicory].Leaf.Transpiration");
			AccumEP -= (double)zone.Get("Chicory.Root.WaterUptake");
			SoilWaterDeficit = (SWC - DUL);
			double OutFlowLat = MathUtilities.Sum(Soil.SoilWater.outflow_lat);
			AccumOutflowLat -= OutFlowLat;
		}
		
		[EventSubscribe("DoManagementCalculations")]
		private void OnDoManagementCalculations(object sender, EventArgs e)
		{
			FomN = MathUtilities.Sum(Soil.SoilNitrogen.FOMN);
			HumN = MathUtilities.Sum(Soil.SoilNitrogen.HumicN);
			BiomN = MathUtilities.Sum(Soil.SoilNitrogen.MicrobialN);
			AccumFert += Fert.NitrogenApplied;
			AccumIrrigation += Irrig.IrrigationApplied;
			
			
			AccumEO -= Soil.SoilWater.Eo;
			AccumES -= Soil.SoilWater.Es; 
			AccumDrainage -= Soil.SoilWater.Drainage;
			AccumRunoff -= Soil.SoilWater.Runoff;
			SWC = MathUtilities.Sum(Soil.SoilWater.SWmm);
			DUL = MathUtilities.Sum(Soil.SoilWater.DULmm);
		}
	}
}
```
              Operations SowAndMaintenance
                1993-06-05  [Chicory].Sow(population: 200, cultivar: "Puna", depth: 10, rowSpacing: 150);
                1993-07-15  [Fertiliser].Apply(Amount: 35, Type: Fertiliser.Types.NH4NO3N, Depth: 10)
                1993-09-15  [Defoliate].Script.Defoliate(defoliationType: "Cut", amountDM: 50, amountType: "ResidualDM", duration: 1)
                1994-04-22  [Fertiliser].Apply(Amount: 35, Type: Fertiliser.Types.NH4NO3N, Depth: 10)
                1995-04-22  [Fertiliser].Apply(Amount: 35, Type: Fertiliser.Types.NH4NO3N, Depth: 10)
              Operations Cuttings
              Manager Defoliate: same as Validation.New Zealand.ScottFarm.ScottFarmC.ScottFarmC17a.Field.Management.Defoliate
            MicroClimate: a_interception=0; b_interception=1; c_interception=0; d_interception=0; soil_albedo=0.23; sun_angle=15; soil_heat_flux_fraction=0.4; night_interception_fraction=0.5; refheight=2; albedo=0.26; emissivity=0.96; RadIntTotal=0
            SurfaceOrganicMatter: same as Validation.New Zealand.ScottFarm.ScottFarmC.ScottFarmC17a.Field.surface organic matter
            Irrigation
            Fertiliser
            Soil Ramsey: SoilType=Typic Hapludult (US); LocalName=Ramsey fine-loam; State=West Virginia; Country=USA; NaturalVegetation=Forest; Latitude=0; Longitude=0; DataSource=National Cooperative Soil Survey, US
              Comments=Generic soil description based on data of the same sol type from different locations
              Analysis: PHUnits=Water; BoronUnits=HotWater
                Thickness  Rocks  PH  CEC  ParticleSizeSand  ParticleSizeSilt  ParticleSizeClay
                130        2      6   6    45                40                15
                240        3      6   4    60                30                10
                280        3      6   3    75                20                5
                250        8      6   3    80                15                5
                600        8      6   2    80                10                10
              Water
                Thickness  BD    AirDry  LL15   DUL    SAT    KS
                130        1.21  0.016   0.04   0.249  0.499  4800
                240        1.43  0.05    0.056  0.25   0.43   2400
                280        1.33  0.04    0.04   0.248  0.469  840
                250        1.5   0.045   0.045  0.212  0.354  1200
                600        1.5   0.045   0.045  0.212  0.354  2400
                SoilCrop ChicorySoil: LL=[0.04, 0.056, 0.04, 0.045, 0.045]; KL=[0.1, 0.1, 0.08, 0.06, 0.04]; XF=[1, 1, 1, 1, 1]
              SoilWater: SummerDate=21-Mar; SummerU=6; SummerCona=3.5; WinterDate=23-Sep; WinterU=6; WinterCona=2.5; DiffusConst=88; DiffusSlope=35; Salb=0.13; CN2Bare=73; CNRed=20; CNCov=0.8; max_pond=0; Thickness=[130, 240, 280, 250, 600]; SWCON=[0.6, 0.5, 0.3, 0.5, 0.5]; residueinterception=0
              SoilNitrogen: fom_type=[default, manure, mucuna, lablab, shemp, stable]; fract_carb=[0.2, 0.3, 0.54, 0.57, 0.45, 0]; fract_cell=[0.7, 0.3, 0.37, 0.37, 0.47, 0.1]; fract_lign=[0.1, 0.4, 0.09, 0.06, 0.08, 0.9]; wfpsN2N2O_x=[22, 88]; wfpsN2N2O_y=[0.1, 1]
              SoilOrganicMatter: RootCN=40; RootWt=1000; SoilCN=11; EnrACoeff=7.4; EnrBCoeff=0.2; OCUnits=Total
                Thickness  OC   FBiom  FInert
                130        3.5  0.03   0.4
                240        1    0.02   0.6
                280        0.5  0.01   0.75
                250        0.3  0.01   0.9
                600        0.1  0.01   0.99
              InitialWater Initial water: PercentMethod=EvenlyDistributed; FractionFull=0.95
              Sample Initial nitrogen: NO3Units=kgha; NH4Units=kgha; SWUnits=Volumetric; OCUnits=Total; PHUnits=Water
                Thickness  NO3  NH4
                130        20   2
                240        15   2
                280        10   1
                850        5    0.5
              CERESSoilTemperature
            Plant Chicory: CropType=Chicory
            Report: EventNames=[Clock].DoReport
            SoluteManager
      Experiment AFSRC_02
        Memo
          This simulation setup was based on a field experiment run for 3 years at the Appalachian Farming Systems Research Center in southern West Virginia, USA.  The sol at this location was a Ramsey soil (loamy, siliceous, subactive, mesic Lithic Dystrudept).  The study aimed to determine whether fertilizer N would influence forage chicory (cultivar '*Puna*') nutritive value and NO3-N concentration.  The treatments consisted of five N rates (0, 80, 160, 240, or 480 kg N/ha) replicated three times in a randomized block design. Swards were clipped at 6-wk intervals during the growing season.  Yield was reported either as annual totals or seasonal, using these the values for each harvest event were arbitrarily inferred (treat this data as rough approximation).
          Met data was based on nearby location obtained from NOAA.  The data set was largely complete except for solar radiation, which was added from an alternative interpolated set for this location, also from NOAA.
          Information to assemble the soil data was obtained from USGS.

          References:
          Belesky, D.P.; Turner, K.E.; Ruckle, J.M. 2000. Influence of nitrogen on productivity and nutritive value of forage chicory. Agronomy Journal, 92(3): 472-478.
        Factors
          Factor NRate: Specifications=[FertiliserSchedule]
            Operations 0N
            Operations 80N
              1994-04-15  [Fertiliser].Apply(Amount: 80, Type: Fertiliser.Types.NH4NO3N, Depth: 10)
              1995-04-15  [Fertiliser].Apply(Amount: 80, Type: Fertiliser.Types.NH4NO3N, Depth: 10)
            Operations 160N
              1994-04-15  [Fertiliser].Apply(Amount: 160, Type: Fertiliser.Types.NH4NO3N, Depth: 10)
              1995-04-15  [Fertiliser].Apply(Amount: 160, Type: Fertiliser.Types.NH4NO3N, Depth: 10)
            Operations 240N
              1994-04-15  [Fertiliser].Apply(Amount: 240, Type: Fertiliser.Types.NH4NO3N, Depth: 10)
              1995-04-15  [Fertiliser].Apply(Amount: 240, Type: Fertiliser.Types.NH4NO3N, Depth: 10)
            Operations 480N
              1994-04-15  [Fertiliser].Apply(Amount: 480, Type: Fertiliser.Types.NH4NO3N, Depth: 10)
              1995-04-15  [Fertiliser].Apply(Amount: 480, Type: Fertiliser.Types.NH4NO3N, Depth: 10)
        Simulation AFSRC_02
          Clock: StartDate=1993-05-01; EndDate=1995-12-31
          Weather: FileName=Beckley.met
          Summary
          SoilArbitrator Soil Arbitrator
          Zone Field: Area=1; Slope=0
            Folder Management
              Manager ExtraVariables: same as Validation.USA.AFSRC_01.AFSRC_01.Field.Management.ExtraVariables
              Operations Establishment
                1993-06-10  [Chicory].Sow(population: 200, cultivar: "Puna", depth: 10, rowSpacing: 150);
                1993-07-20  [Fertiliser].Apply(Amount: 35, Type: Fertiliser.Types.NH4NO3N, Depth: 10)
                1993-09-25  [Defoliate].Script.Defoliate(defoliationType: "Cut", amountDM: 50, amountType: "ResidualDM", duration: 1)
              Operations Cuttings
                1994-05-27  [Defoliate].Script.Defoliate(defoliationType: "Cut", amountDM: 40, amountType: "ResidualDM", duration: 1)
                1994-07-02  [Defoliate].Script.Defoliate(defoliationType: "Cut", amountDM: 40, amountType: "ResidualDM", duration: 1)
                1994-08-08  [Defoliate].Script.Defoliate(defoliationType: "Cut", amountDM: 40, amountType: "ResidualDM", duration: 1)
                1994-09-25  [Defoliate].Script.Defoliate(defoliationType: "Cut", amountDM: 40, amountType: "ResidualDM", duration: 1)
                1995-05-27  [Defoliate].Script.Defoliate(defoliationType: "Cut", amountDM: 40, amountType: "ResidualDM", duration: 1)
                1995-07-02  [Defoliate].Script.Defoliate(defoliationType: "Cut", amountDM: 40, amountType: "ResidualDM", duration: 1)
                1995-08-08  [Defoliate].Script.Defoliate(defoliationType: "Cut", amountDM: 40, amountType: "ResidualDM", duration: 1)
                1995-09-25  [Defoliate].Script.Defoliate(defoliationType: "Cut", amountDM: 40, amountType: "ResidualDM", duration: 1)
              Operations FertiliserSchedule
              Manager Defoliate: same as Validation.New Zealand.ScottFarm.ScottFarmC.ScottFarmC17a.Field.Management.Defoliate
            MicroClimate: a_interception=0; b_interception=1; c_interception=0; d_interception=0; soil_albedo=0.23; sun_angle=15; soil_heat_flux_fraction=0.4; night_interception_fraction=0.5; refheight=2; albedo=0.26; emissivity=0.96; RadIntTotal=0
            SurfaceOrganicMatter: same as Validation.New Zealand.ScottFarm.ScottFarmC.ScottFarmC17a.Field.surface organic matter
            Irrigation
            Fertiliser
            Soil Ramsey: same as Validation.USA.AFSRC_01.AFSRC_01.Field.Ramsey
            Plant Chicory: CropType=Chicory
            Report: EventNames=[Clock].DoReport
            SoluteManager
      Experiment RELARC_01
        Memo
          This simulation was adapted from a defoliation trial conducted in 1998-1999, at Russell E. Larson Agricultural Research Center, Pennsylvania, USA.  The trial consisted of small plots where two chicory cultivars ('*Puna*' and '*Feast*') were sown separately in May-1997 (at 4.5 kg seed/ha).  Plots were fertilized with 27 kgP and 72 kgK/ha in October 1997 and April 1999. Fertilizer N was applied at 56 kg/ha in June and July of 1998 and 1999.  Treatments were replicated five times and the soil at the site was a Hagerstown silt loam (fine, mixed, semiactive mesic Typic Hapludalfs).
          Each plot was divided in two, one-half was harvested every 3 wk and the other half every 5 wk. Each strip was cut to a 7-cm height with a rotary mower.  Dates for each cut were given, but only annual and treatment yields are reported;  population numbers were provided for few specific dates.  Yield for each harvest were arbitrarily inferred, therefore they should be seen as rough indication only.
          Met file was built using data obtained from NOAA website.  The data set was largely complete except for solar radiation, which was added from an alternative interpolated set for this location, also from NOAA.
          Information to assemble the soil data was obtained from USGS.

          References:
          Sanderson, M.A.; Labreveux, M.; Hall, M.H.; Elwinger, G.F. 2003. Forage yield and persistence of chicory and english plantain. Crop Science, 43: 995-1000.
        Factors
          Factor Cultivar: Specifications=[Sowing]
            Operations Puna
              1997-05-16  [Chicory].Sow(population: 250, cultivar: "Puna", depth: 10, rowSpacing: 150)
            Operations Feast
              1997-05-16  [Chicory].Sow(population: 250, cultivar: "Puna", depth: 10, rowSpacing: 150)
          Factor CutFrequency: Specifications=[Cuttings]
            Operations 3wks
              1998-05-19  [Defoliate].Script.Defoliate(defoliationType: "Cut", amountDM: 40, amountType: "ResidualDM", duration: 1)
              1998-06-10  [Defoliate].Script.Defoliate(defoliationType: "Cut", amountDM: 40, amountType: "ResidualDM", duration: 1)
              1998-06-30  [Defoliate].Script.Defoliate(defoliationType: "Cut", amountDM: 40, amountType: "ResidualDM", duration: 1)
              1998-07-21  [Defoliate].Script.Defoliate(defoliationType: "Cut", amountDM: 40, amountType: "ResidualDM", duration: 1)
              1998-08-11  [Defoliate].Script.Defoliate(defoliationType: "Cut", amountDM: 40, amountType: "ResidualDM", duration: 1)
              1998-09-02  [Defoliate].Script.Defoliate(defoliationType: "Cut", amountDM: 40, amountType: "ResidualDM", duration: 1)
              1998-09-23  [Defoliate].Script.Defoliate(defoliationType: "Cut", amountDM: 40, amountType: "ResidualDM", duration: 1)
              1999-05-20  [Defoliate].Script.Defoliate(defoliationType: "Cut", amountDM: 40, amountType: "ResidualDM", duration: 1)
              1999-06-10  [Defoliate].Script.Defoliate(defoliationType: "Cut", amountDM: 40, amountType: "ResidualDM", duration: 1)
              1999-07-01  [Defoliate].Script.Defoliate(defoliationType: "Cut", amountDM: 40, amountType: "ResidualDM", duration: 1)
              1999-07-22  [Defoliate].Script.Defoliate(defoliationType: "Cut", amountDM: 40, amountType: "ResidualDM", duration: 1)
              1999-08-12  [Defoliate].Script.Defoliate(defoliationType: "Cut", amountDM: 40, amountType: "ResidualDM", duration: 1)
              1999-09-02  [Defoliate].Script.Defoliate(defoliationType: "Cut", amountDM: 40, amountType: "ResidualDM", duration: 1)
              1999-09-23  [Defoliate].Script.Defoliate(defoliationType: "Cut", amountDM: 40, amountType: "ResidualDM", duration: 1)
            Operations 5wks
              1998-05-19  [Defoliate].Script.Defoliate(defoliationType: "Cut", amountDM: 40, amountType: "ResidualDM", duration: 1)
              1998-06-24  [Defoliate].Script.Defoliate(defoliationType: "Cut", amountDM: 40, amountType: "ResidualDM", duration: 1)
              1998-07-29  [Defoliate].Script.Defoliate(defoliationType: "Cut", amountDM: 40, amountType: "ResidualDM", duration: 1)
              1998-09-02  [Defoliate].Script.Defoliate(defoliationType: "Cut", amountDM: 40, amountType: "ResidualDM", duration: 1)
              1998-10-07  [Defoliate].Script.Defoliate(defoliationType: "Cut", amountDM: 40, amountType: "ResidualDM", duration: 1)
              1999-05-20  [Defoliate].Script.Defoliate(defoliationType: "Cut", amountDM: 40, amountType: "ResidualDM", duration: 1)
              1999-06-24  [Defoliate].Script.Defoliate(defoliationType: "Cut", amountDM: 40, amountType: "ResidualDM", duration: 1)
              1999-07-29  [Defoliate].Script.Defoliate(defoliationType: "Cut", amountDM: 40, amountType: "ResidualDM", duration: 1)
              1999-09-02  [Defoliate].Script.Defoliate(defoliationType: "Cut", amountDM: 40, amountType: "ResidualDM", duration: 1)
              1999-10-07  [Defoliate].Script.Defoliate(defoliationType: "Cut", amountDM: 40, amountType: "ResidualDM", duration: 1)
        Simulation TPASU_01
          Clock: StartDate=1997-05-01; EndDate=1999-10-31
          Weather: FileName=StateCollege.met
          Summary
          SoilArbitrator Soil Arbitrator
          Zone Field: Area=1; Slope=0
            Folder Management
              Manager ExtraVariables: same as Validation.USA.AFSRC_01.AFSRC_01.Field.Management.ExtraVariables
              Operations Sowing
                1997-09-15  [Defoliate].Script.Defoliate(defoliationType: "Cut", amountDM: 50, amountType: "ResidualDM", duration: 1)
                1998-06-11  [Fertiliser].Apply(Amount: 56, Type: Fertiliser.Types.NH4NO3N, Depth: 10)
                1998-07-30  [Fertiliser].Apply(Amount: 56, Type: Fertiliser.Types.NH4NO3N, Depth: 10)
                1999-06-11  [Fertiliser].Apply(Amount: 56, Type: Fertiliser.Types.NH4NO3N, Depth: 10)
                1999-07-30  [Fertiliser].Apply(Amount: 56, Type: Fertiliser.Types.NH4NO3N, Depth: 10)
              Operations FertiliserSchedule: same as Validation.USA.RELARC_01.TPASU_01.Field.Management.Sowing
              Operations Cuttings
              Manager Defoliate: same as Validation.New Zealand.ScottFarm.ScottFarmC.ScottFarmC17a.Field.Management.Defoliate
            MicroClimate: a_interception=0; b_interception=1; c_interception=0; d_interception=0; soil_albedo=0.23; sun_angle=15; soil_heat_flux_fraction=0.4; night_interception_fraction=0.5; refheight=2; albedo=0.26; emissivity=0.96; RadIntTotal=0
            SurfaceOrganicMatter: same as Validation.New Zealand.ScottFarm.ScottFarmC.ScottFarmC17a.Field.surface organic matter
            Irrigation
            Fertiliser
            Soil HagerstownSoil: SoilType=Typic Hapludult (US); LocalName=Ramsey fine-loam; State=West Virginia; Country=USA; NaturalVegetation=Forest; Latitude=0; Longitude=0; DataSource=National Cooperative Soil Survey, US
              Comments=Generic soil description based on data of the same sol type from different locations
              Analysis: PHUnits=Water; BoronUnits=HotWater
                Thickness  Rocks  PH  CEC   ParticleSizeSand  ParticleSizeSilt  ParticleSizeClay
                100        4.4    6   10.3  11.4              66.9              21.7
                120        5.7    6   10.3  10.9              66.7              22.4
                130        10.2   6   9.1   11.9              64.3              23.8
                200        8.9    6   8.8   13.7              60.8              25.5
                300        9.4    6   10.1  11.1              45.6              43.3
                300        8.1    6   10    8.7               39.9              51.4
                350        1.6    6   9.7   9.3               42.7              48
              Water
                Thickness  BD    AirDry  LL15   DUL    SAT    KS
                100        1.3   0.048   0.12   0.277  0.465  1200
                120        1.38  0.085   0.094  0.264  0.421  420
                130        1.37  0.079   0.079  0.238  0.381  275
                200        1.41  0.094   0.094  0.222  0.381  200
                300        1.47  0.141   0.141  0.255  0.338  80
                300        1.48  0.155   0.155  0.28   0.359  40
                350        1.52  0.166   0.166  0.296  0.409  80
                SoilCrop ChicorySoil: LL=[0.12, 0.09, 0.08, 0.09, 0.14, 0.16, 0.17]; KL=[0.1, 0.09, 0.08, 0.05, 0.03, 0.02, 0.02]; XF=[1, 1, 1, 1, 1, 1, 1]
              SoilWater: SummerDate=21-Mar; SummerU=6; SummerCona=3.5; WinterDate=23-Sep; WinterU=6; WinterCona=2.5; DiffusConst=88; DiffusSlope=35; Salb=0.13; CN2Bare=73; CNRed=20; CNCov=0.8; max_pond=0; Thickness=[100, 120, 130, 200, 300, 300, 350]; SWCON=[0.6, 0.5, 0.3, 0.3, 0.25, 0.2, 0.3]; residueinterception=0
              SoilNitrogen: fom_type=[default, manure, mucuna, lablab, shemp, stable]; fract_carb=[0.2, 0.3, 0.54, 0.57, 0.45, 0]; fract_cell=[0.7, 0.3, 0.37, 0.37, 0.47, 0.1]; fract_lign=[0.1, 0.4, 0.09, 0.06, 0.08, 0.9]; wfpsN2N2O_x=[22, 88]; wfpsN2N2O_y=[0.1, 1]
              SoilOrganicMatter: RootCN=40; RootWt=1000; SoilCN=11; EnrACoeff=7.4; EnrBCoeff=0.2; OCUnits=Total
                Thickness  OC    FBiom  FInert
                100        3.26  0.03   0.4
                120        1.17  0.02   0.6
                130        0.39  0.01   0.75
                200        0.4   0.01   0.875
                300        0.25  0.01   0.95
                300        0.2   0.01   0.99
                350        0.15  0.01   0.99
              InitialWater Initial water: PercentMethod=EvenlyDistributed; FractionFull=0.95
              Sample Initial nitrogen: NO3Units=kgha; NH4Units=kgha; SWUnits=Volumetric; OCUnits=Total; PHUnits=Water
                Thickness  NO3  NH4
                100        20   2
                120        15   2
                330        10   1
                950        5    0.5
              CERESSoilTemperature
            Plant Chicory: CropType=Chicory
            Report: EventNames=[Clock].DoReport
            SoluteManager
      Experiment RELARC_02
        Memo
          This simulation was adapted from a defoliation trial conducted in 2000-2001, at Russell E. Larson Agricultural Research Center, Pennsylvania, USA.  The trial was established in small plots, replicated five times, with chicory sown in April-1999 (Cultivars '*Puna*', '*Feast*' and '*La Certa*'.  All plots received 4.5 t/ha of limestone and were fertilized with 56 kg N/ha in April, June and July of 2000 and 2001.  The soil at the site was a Hagerstown silt loam (fine, mixed, semiactive mesic Typic Hapludalfs).
          Each plot was mechanically mowed to height of 7cm every 4 weeks.  Only annual and treatment yields are reported, however population was given for specific dates.  Dates for each harvest were reported.  From these data, yield was arbitrarily inferred for each harvest, therefore they should be seen as rough approximation only (N variation between cultivars were considered here).
          Met file was built using data obtained from NOAA website.  The data set was largely complete except for solar radiation, which was added from an alternative interpolated set for this location, also from NOAA.
          Information to assemble the soil data was obtained from USGS.

          References:
          Sanderson, M.A.; Labreveux, M.; Hall, M.H.; Elwinger, G.F. 2003. Forage yield and persistence of chicory and english plantain. Crop Science, 43: 995-1000.
        Factors
          Factor Cultivars: Specifications=[Sowing]
            Operations Puna
              1999-04-28  [Chicory].Sow(population: 250, cultivar: "Puna", depth: 10, rowSpacing: 150)
            Operations Feast
              1999-04-28  [Chicory].Sow(population: 250, cultivar: "Puna", depth: 10, rowSpacing: 150)
            Operations LaCerta
              1999-04-28  [Chicory].Sow(population: 250, cultivar: "Puna", depth: 10, rowSpacing: 150)
        Simulation TPASU_02
          Clock: StartDate=1999-04-01; EndDate=2001-10-31
          Weather: FileName=StateCollege.met
          Summary
          SoilArbitrator Soil Arbitrator
          Zone Field: Area=1; Slope=0
            Folder Management
              Manager ExtraVariables: same as Validation.USA.AFSRC_01.AFSRC_01.Field.Management.ExtraVariables
              Operations Sowing
              Operations FertiliserSchedule
                1999-09-15  [Defoliate].Script.Defoliate(defoliationType: "Cut", amountDM: 50, amountType: "ResidualDM", duration: 1)
                2000-04-25  [Fertiliser].Apply(Amount: 56, Type: Fertiliser.Types.NH4NO3N, Depth: 10)
                2000-06-15  [Fertiliser].Apply(Amount: 56, Type: Fertiliser.Types.NH4NO3N, Depth: 10)
                2000-07-12  [Fertiliser].Apply(Amount: 56, Type: Fertiliser.Types.NH4NO3N, Depth: 10)
                2001-04-25  [Fertiliser].Apply(Amount: 56, Type: Fertiliser.Types.NH4NO3N, Depth: 10)
                2001-06-05  [Fertiliser].Apply(Amount: 56, Type: Fertiliser.Types.NH4NO3N, Depth: 10)
                2001-07-04  [Fertiliser].Apply(Amount: 56, Type: Fertiliser.Types.NH4NO3N, Depth: 10)
              Operations Cuttings
                2000-05-16  [Defoliate].Script.Defoliate(defoliationType: "Cut", amountDM: 40, amountType: "ResidualDM", duration: 1)
                2000-06-14  [Defoliate].Script.Defoliate(defoliationType: "Cut", amountDM: 40, amountType: "ResidualDM", duration: 1)
                2000-07-11  [Defoliate].Script.Defoliate(defoliationType: "Cut", amountDM: 40, amountType: "ResidualDM", duration: 1)
                2000-08-08  [Defoliate].Script.Defoliate(defoliationType: "Cut", amountDM: 40, amountType: "ResidualDM", duration: 1)
                2000-09-05  [Defoliate].Script.Defoliate(defoliationType: "Cut", amountDM: 40, amountType: "ResidualDM", duration: 1)
                2001-06-04  [Defoliate].Script.Defoliate(defoliationType: "Cut", amountDM: 40, amountType: "ResidualDM", duration: 1)
                2001-07-03  [Defoliate].Script.Defoliate(defoliationType: "Cut", amountDM: 40, amountType: "ResidualDM", duration: 1)
                2001-07-31  [Defoliate].Script.Defoliate(defoliationType: "Cut", amountDM: 40, amountType: "ResidualDM", duration: 1)
                2001-09-05  [Defoliate].Script.Defoliate(defoliationType: "Cut", amountDM: 40, amountType: "ResidualDM", duration: 1)
              Manager Defoliate: same as Validation.New Zealand.ScottFarm.ScottFarmC.ScottFarmC17a.Field.Management.Defoliate
            MicroClimate: a_interception=0; b_interception=1; c_interception=0; d_interception=0; soil_albedo=0.23; sun_angle=15; soil_heat_flux_fraction=0.4; night_interception_fraction=0.5; refheight=2; albedo=0.26; emissivity=0.96; RadIntTotal=0
            SurfaceOrganicMatter: same as Validation.New Zealand.ScottFarm.ScottFarmC.ScottFarmC17a.Field.surface organic matter
            Irrigation
            Fertiliser
            Soil HagerstownSoil: same as Validation.USA.RELARC_01.TPASU_01.Field.HagerstownSoil
            Plant Chicory: CropType=Chicory
            Report: EventNames=[Clock].DoReport
            SoluteManager
      Memo SubTitle
        ### All data from USA
    Memo SubTitle
      ### All available data

      **Note:**
       - Plant population is inclued here as but it is not considered for validation as it is not explictly simulated by the model;
       - Data of harvested biomass from USA simulations are not included as only seasonal or annual totals were available;
       - N concentration is currently poorly described and its predicted×observed graph is not included;
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