Simulations: Version=2
  Replacements
    Plant Chicory: CropType=Chickpea
      Memo Introduction
        The APSIM Chickpea model has been developed from the original APSIM Chickpea model described by Robertson et al(2002) using the Plant Modelling Framework of Brown et al (2014).
      OrganArbitrator Arbitrator: NArbitrationOption=RelativeAllocation; DMArbitrationOption=RelativeAllocation
      Phenology
        AirTemperatureFunction ThermalTime
          Memo
            The cardinal temperatures for calculating thermal time have been taken from Singh and Virmani (1996) as used by Robertson et al (2002).
          XYPairs: X=[0, 30, 40]; Y=[0, 30, 0]
        PhotoperiodFunction Photoperiod: Twilight=-6
        GerminatingPhase Germinating: Start=Sowing; End=Germination
        EmergingPhase Emerging: Start=Germination; End=Emergence; ShootLag=15; ShootRate=2
          VariableReference ThermalTime: VariableName=[Phenology].ThermalTime.Value
        NodeNumberPhase Vegetative: Start=Emergence; End=StartFlowering
          Memo
            Robertson et al (2002) described early post-emergent chickpea development in terms of juvenile and inductive phases. In this model we describe a vegetative growth phase, which is photoperiod dependant.
          LinearInterpolationFunction CompletionNodeNumber: XProperty=[Phenology].Photoperiod.Value
            XYPairs: X=[10.7, 17]; Y=[33, 12]
        NodeNumberPhase Flowering: Start=StartFlowering; End=EndFlowering
          AddFunction CompletionNodeNumber
            VariableReference VegetativeNodes: VariableName=[Phenology].NFF.Value
            LinearInterpolationFunction FloweringNodes: XProperty=[Phenology].Photoperiod.Value
              XYPairs: X=[13, 16]; Y=[9.8, 9.8]
          MultiplyFunction Target
            VariableReference NodeNumberDuration
              VariableName=[Phenology].Flowering.CompletionNodeNumber.FloweringNodes.Value
            VariableReference Phyllochron: VariableName=[Structure].MainStemNodeAppearanceRate.Value
        GenericPhase GrainFilling: Start=EndFlowering; End=EndGrainFill
          Memo
            The duration of the grain filling phase has been taken from the model of Robertson et al (2002).
          Constant Target: Value=690
          VariableReference ThermalTime: VariableName=[Phenology].ThermalTime.Value
        GenericPhase Maturing: Start=EndGrainFill; End=Maturity
          Memo
            The duration of the Maturing phase has been taken from the model of Robertson et al (2002).
          Constant Target: Value=60
          VariableReference ThermalTime: VariableName=[Phenology].ThermalTime.Value
        GenericPhase Ripening: Start=Maturity; End=HarvestRipe
          Constant Target: Value=1
          VariableReference ThermalTime: VariableName=[Phenology].ThermalTime.Value
        EndPhase ReadyForHarvesting: Start=HarvestRipe; End=Unused
          VariableReference ThermalTime: VariableName=[Phenology].ThermalTime.Value
        OnEventFunction NFF: SetEvent=StartFlowering; ReSetEvent=never
          Constant PreEventValue: Value=0
          VariableReference PostEventValue: VariableName=[Phenology].Vegetative.CompletionNodeNumber.Value
        OnEventFunction FN: SetEvent=EndFlowering; ReSetEvent=never
          Constant PreEventValue: Value=0
          SubtractFunction PostEventValue
            VariableReference PostEventValue: VariableName=[Structure].MainStemNodeNo
            VariableReference PostEventValue1: VariableName=[Phenology].NFF.Value
        OnEventFunction FloweringDAS: SetEvent=StartFlowering; ReSetEvent=never
          Memo
            A function is used to provide flowering date as days after sowing(DAS).
          Constant PreEventValue: Value=0
          VariableReference PostEventValue: VariableName=[Phenology].DaysAfterSowing
        OnEventFunction MaturityDAS: SetEvent=Maturity; ReSetEvent=never
          Memo
            A function is used to provide maturity date as days after sowing(DAS).
          Constant PreEventValue: Value=0
          VariableReference PostEventValue: VariableName=[Phenology].DaysAfterSowing
        AddFunction FinalNodeNo
          VariableReference NodeAtFirstFlower: VariableName=[Phenology].NFF.Value
          VariableReference FloweringNodes: VariableName=[Phenology].FN.Value
      Structure: InitialiseStage=Emergence; PrimaryBudNo=0
        VariableReference ThermalTime: VariableName=[Phenology].ThermalTime.Value
        Constant DroughtInducedBranchMortality: Value=0
        Constant HeightModel: Value=1
        Constant MainStemFinalNodeNumber: Value=40
        LinearInterpolationFunction Height: XProperty=[Stem].Live.Wt
          XYPairs: X=[0, 300]; Y=[10, 750]
        MultiplyFunction BranchingRate
          LinearInterpolationFunction Potential_Branching_Rate: XProperty=[Structure].MainStemNodeNo
            XYPairs: X=[0, 6, 8, 10, 20, 31]; Y=[0, 0, 1, 2, 0, 0]
          LinearInterpolationFunction Cover_response: XProperty=[leaf].CoverGreen
            XYPairs: X=[0, 0.17, 0.25]; Y=[1, 1, 1]
          LinearInterpolationFunction CHO_response: XProperty=[Stem].Live.NonStructuralWt
            XYPairs: X=[0, 1, 10]; Y=[1, 1, 1]
        Constant BranchMortality: Value=0
        VariableReference MainStemPrimordiaInitiationRate: VariableName=[Structure].MainStemNodeAppearanceRate.Value
        PhaseLookup MainStemNodeAppearanceRate
          PhaseLookupValue PreEmergence: Start=Germination; End=Emergence
            Constant Function: Value=0
          PhaseLookupValue CanopyDevelopment: Start=Emergence; End=EndFlowering
            LinearInterpolationFunction MainStemNodeAppearanceRate: XProperty=[Structure].MainStemNodeNo
              XYPairs: X=[1, 2, 3, 4, 30]; Y=[20, 20, 20, 50, 50]
          PhaseLookupValue Reproductive: Start=EndFlowering; End=Maturity
            Constant Function: Value=0
      ReproductiveOrgan Grain
        Constant MaximumPotentialGrainSize: Value=0.22
        PhaseLookup DMDemandFunction
          PhaseLookupValue GrainFilling: Start=StartFlowering; End=EndGrainFill
            FillingRateFunction
              VariableReference NumberFunction: VariableName=[Grain].NumberFunction.Value
              AddFunction FillingDuration
                VariableReference FillingDuration: VariableName=[Phenology].GrainFilling.Target.Value
                VariableReference FillingDuration: VariableName=[Phenology].GrainFilling.Target.Value
              VariableReference ThermalTime: VariableName=[Phenology].ThermalTime.Value
              VariableReference PotentialSizeIncrement: VariableName=[Grain].MaximumPotentialGrainSize.Value
        Biomass Live
        Biomass Dead
        Constant MinimumNConc: Value=0.02
        Constant MaximumNConc: Value=0.037
        Constant WaterContent: Value=0.12
        PhaseLookup NFillingRate
          PhaseLookupValue GrainFilling: Start=StartFlowering; End=EndGrainFill
            FillingRateFunction
              VariableReference NumberFunction: VariableName=[Grain].NumberFunction.Value
              AddFunction FillingDuration
                VariableReference FillingDuration: VariableName=[Phenology].Flowering.Target.Value
                VariableReference FillingDuration: VariableName=[Phenology].GrainFilling.Target.Value
              VariableReference ThermalTime: VariableName=[Phenology].ThermalTime.Value
              MultiplyFunction PotentialSizeIncrement
                Constant MaximumFinalNConc: Value=0.037
                VariableReference MaximumSize: VariableName=[Grain].MaximumPotentialGrainSize.Value
        MultiplyFunction NumberFunction
          Constant PeasPerPod: Value=1.5
          VariableReference PodNumber: VariableName=[Shell].PodNumber.Value
        Folder BiomassRemovalDefaults
          OrganBiomassRemovalType Harvest: FractionRemoved=1; FractionToResidue=0
          OrganBiomassRemovalType Cut: FractionRemoved=1; FractionToResidue=0
          OrganBiomassRemovalType Prune: FractionRemoved=0; FractionToResidue=0.8
          OrganBiomassRemovalType Graze: FractionRemoved=0.6; FractionToResidue=0.2
      Root: InitialDM=0.2; SpecificRootLength=40000; NuptakeSupply=0
        CompositeBiomass Live: Propertys=[[Root].LayerLive]
        CompositeBiomass Dead: Propertys=[[Root].LayerDead]
        LinearInterpolationFunction KLModifier: XProperty=[Leaf].LAI
          XYPairs: X=[0, 3]; Y=[1, 1]
        AirTemperatureFunction TemperatureEffect
          XYPairs: X=[0, 26, 35]; Y=[1, 1, 1]
        Constant MaxDailyNUptake: Value=6
        Constant SenescenceRate: Value=0.005
        PhaseLookup RootFrontVelocity
          PhaseLookupValue PreEmergence: Start=Germination; End=Emergence
            Constant Function: Value=3
          PhaseLookupValue early: Start=Emergence; End=StartFlowering
            Constant Function: Value=15
          PhaseLookupValue late: Start=StartFlowering; End=Maturity
            Constant Function: Value=17
        PhaseLookup PartitionFraction
          PhaseLookupValue Early: Start=Emergence; End=StartFlowering
            Constant Function: Value=0.1
          PhaseLookupValue Middle: Start=StartFlowering; End=EndFlowering
            Constant Function: Value=0.08
          PhaseLookupValue Late: Start=EndFlowering; End=Maturity
            Constant Function: Value=0
        Constant MaximumNConc: Value=0.01
        Constant MinimumNConc: Value=0.005
        PhaseBasedSwitch NitrogenDemandSwitch: Start=Emergence; End=EndGrainFill
        Folder BiomassRemovalDefaults
          OrganBiomassRemovalType Harvest: FractionRemoved=0; FractionToResidue=0.2
          OrganBiomassRemovalType Cut: FractionRemoved=0; FractionToResidue=0.3
          OrganBiomassRemovalType Prune: FractionRemoved=0; FractionToResidue=0.1
          OrganBiomassRemovalType Graze: FractionRemoved=0; FractionToResidue=0.15
        LinearInterpolationFunction KNO3: XProperty=[Root].RootLengthDenisty
          XYPairs: X=[0, 0.003]; Y=[0.02, 0.02]
        LinearInterpolationFunction KNH4: XProperty=[Root].RootLengthDenisty
          XYPairs: X=[0, 0.003]; Y=[0, 0]
      GenericAboveGroundOrgan Shell
        Biomass Live
        Biomass Dead
        Constant NReallocationFactor: Value=0
        Constant NRetranslocationFactor: Value=0.1
        Constant StructuralFraction: Value=0.7
        Constant MaximumNConc: Value=0.03
        Constant MinimumNConc: Value=0.01
        Constant DMRetranslocationFactor: Value=0.1
        PhaseBasedSwitch NitrogenDemandSwitch: Start=Germination; End=Maturity
        PopulationBasedDemandFunction DMDemandFunction
          VariableReference ThermalTime: VariableName=[Phenology].ThermalTime.Value
          VariableReference OrganPopulation: VariableName=[Shell].PodNumber.Value
          Constant ExpansionStress: Value=1
          AddFunction GrowthDuration
            VariableReference FloweringGrowthPeriod: VariableName=[Phenology].Flowering.Target.Value
            Constant PostFloweringGrowthPeriod: Value=60
          Constant StartStage: Value=4
          Constant MaximumOrganWt: Value=0.05
        MultiplyFunction PodNumber
          Constant PodsPerNode: Value=1
          VariableReference StemPopulation: VariableName=[Structure].TotalStemPopn
          PhaseLookupValue FloweringNodes: Start=StartFlowering; End=HarvestRipe
            SubtractFunction FloweringNodes
              VariableReference TotalNodes: VariableName=[Structure].MainStemNodeNo
              VariableReference VegetativeNodes: VariableName=[Phenology].NFF.Value
        Folder BiomassRemovalDefaults
          OrganBiomassRemovalType Harvest: FractionRemoved=0.5; FractionToResidue=0.1
          OrganBiomassRemovalType Cut: FractionRemoved=0.8; FractionToResidue=0
          OrganBiomassRemovalType Prune: FractionRemoved=0; FractionToResidue=0.6
          OrganBiomassRemovalType Graze: FractionRemoved=0.6; FractionToResidue=0.2
      Leaf: MaxCover=1; R50=200; KDead=0.3
        zero: CurrentExpandingLeaf, StartFractionExpanded, FractionNextleafExpanded, _ExpandedNodeNo, DeadNodesYesterday, Albedo, Gsmax, FRGR, PotentialEP, FractionDied
        CompositeBiomass Live: Propertys=[[Leaf].CohortLive]
        CompositeBiomass Dead: Propertys=[[Leaf].CohortDead]
        ArrayBiomass CohortArrayLive: Propertys=[[Leaf].Live]; ArraySize=[Leaf].MaxNodeNo
        ArrayBiomass CohortArrayDead: Propertys=[[Leaf].Dead]; ArraySize=[Leaf].MaxNodeNo
        LeafCohort InitialLeaf1: Rank=1; Area=300
        LeafCohort InitialLeaf2: Rank=2; Area=150
        LeafCohort InitialLeaf3: Rank=3; Area=0
        VariableReference ThermalTime: VariableName=[Phenology].ThermalTime.Value
        LeafCohortParameters
          Constant SenessingLeafRelativeSize: Value=1; Units=0-1
          LinearInterpolationFunction MaxAreaOLD: XProperty=[Structure].MainStemNodeNo
            Memo
              Robertson et al (2002) used a maximum leaf size of 300 mm2 for the first 9 leaves and 600 mm2 thereafter.
            XYPairs: X=[1, 12, 16, 19]; Y=[300, 300, 450, 850]
          LinearInterpolationFunction MaxArea: XProperty=[Structure].MainStemNodeNo
            Memo
              Robertson et al (2002) used a maximum leaf size of 300 mm2 for the first 9 leaves and 600 mm2 thereafter.
            XYPairs: X=[1, 5, 10, 21]; Y=[224, 224, 489, 1080]
          MultiplyFunction GrowthDuration
            Constant Multiplier: Value=4
            VariableReference Phyllochron: VariableName=[Structure].MainStemNodeAppearanceRate.Value
          MultiplyFunction LagDuration
            Constant Multiplier: Value=20
            VariableReference Phyllochron: VariableName=[Structure].MainStemNodeAppearanceRate.Value
          MultiplyFunction SenescenceDuration
            Constant Multiplier: Value=2
            VariableReference Phyllochron: VariableName=[Structure].MainStemNodeAppearanceRate.Value
          Constant DetachmentLagDuration: Value=1
          Constant DetachmentDuration: Value=46
          LinearInterpolationFunction SpecificLeafAreaMax: XProperty=[Leaf].LAI
            Memo
              Maximum specific leaf area has been taken from Robertson et al (2002).
            XYPairs: X=[0, 3]; Y=[22000, 15000]
          Constant StructuralFraction: Value=0.7
          LinearInterpolationFunction SpecificLeafAreaMin: XProperty=[Leaf].LAI
            XYPairs: X=[0, 4]; Y=[15000, 15000]
          LinearInterpolationFunction ExpansionStress: XProperty=[Chicory].WaterSupplyDemandRatio
            XYPairs: X=[0, 1]; Y=[0, 1]
          Constant MinimumNConc: Value=0.03
          Constant CriticalNConc: Value=0.05
          Constant MaximumNConc: Value=0.08
          Constant NReallocationFactor: Value=0.3
          Constant NRetranslocationFactor: Value=0.1
          Constant DMRetranslocationFactor: Value=0
          LinearInterpolationFunction ShadeInducedSenescenceRate: XProperty=[Leaf].CohortCurrentRankCoverAbove
            XYPairs: X=[0, 0.8, 0.9, 0.99]; Y=[0, 0, 0.1, 0.1]
          Constant InitialNConc: Value=0.08
          Constant NonStructuralFraction: Value=0
        LinearInterpolationFunction ExtinctionCoeff: XProperty=[Chicory].SowingData.RowSpacing
          XYPairs: X=[200, 350, 1000]; Y=[0.7, 0.55, 0.45]
        RUEModel Photosynthesis
          Constant RUE: Value=1
          WeightedTemperatureFunction FT: MaximumTemperatureWeighting=0.5
            XYPairs: X=[0, 15, 30, 40]; Y=[0, 1, 1, 0]
          LinearInterpolationFunction FVPD: XProperty=[Leaf].Photosynthesis.VPD
            XYPairs: X=[0, 10, 50]; Y=[1, 1, 1]
          LinearInterpolationFunction FN: XProperty=[Leaf].Fn
            XYPairs: X=[0, 1, 1.5]; Y=[1, 1, 1]
          LinearInterpolationFunction FW: XProperty=[Leaf].Fw
            XYPairs: X=[0, 1, 1.5]; Y=[1, 1, 1]
          RUECO2Function FCO2: PhotosyntheticPathway=C3
          Memo
            Ayaz eta 2004 presented a RUE of 1.6 g/MJ PAR during non-limiting temperature conditions for field pea.  Halving this to make it total radiation gives 0.8 g/MJ and adding 20% to account for root and  nodule production and N fixiation costs gives 1.0 g/MJ
          VariableReference RadnInt: VariableName=[Leaf].RadIntTot
        LinearInterpolationFunction FrostFraction: XProperty=[Weather].MinT
          XYPairs: X=[-1, 0]; Y=[0, 0]
        MinimumFunction FRGRFunction
          VariableReference RUE_FT: VariableName=[Leaf].Photosynthesis.FT.Value
          MinimumFunction Others
            VariableReference RUE_FN: VariableName=[Leaf].Photosynthesis.FN.Value
            VariableReference RUE_FVPD: VariableName=[Leaf].Photosynthesis.FVPD.Value
        Folder BiomassRemovalDefaults
          OrganBiomassRemovalType Harvest: FractionRemoved=0; FractionToResidue=0.3
          OrganBiomassRemovalType Cut: FractionRemoved=0.8; FractionToResidue=0
          OrganBiomassRemovalType Prune: FractionRemoved=0; FractionToResidue=0.6
          OrganBiomassRemovalType Graze: FractionRemoved=0.6; FractionToResidue=0.1
      GenericAboveGroundOrgan Stem
        Biomass Live
        Biomass Dead
        Constant NReallocationFactor: Value=0
        Constant NRetranslocationFactor: Value=0.1
        Constant DMRetranslocationFactor: Value=0.1
        Constant MaximumNConc: Value=0.03
        Constant MinimumNConc: Value=0.01
        PhaseBasedSwitch NitrogenDemandSwitch: Start=Emergence; End=EndGrainFill
        Constant StructuralFraction: Value=0.7
        Folder BiomassRemovalDefaults: same as Replacements.Chicory.Shell.BiomassRemovalDefaults
        PartitionFractionDemandFunction DMDemandFunction
          PhaseLookup PartitionFraction
            PhaseLookupValue PreStemElongation: Start=Emergence; End=StartFlowering
              Constant StemFraction: Value=0.4
            PhaseLookupValue StemElongation: Start=StartFlowering; End=EndFlowering
              Constant StemFraction: Value=0.6
      CompositeBiomass AboveGround
        Propertys=[[Leaf].Live, [Leaf].Dead, [Stem].Live, [Stem].Dead, [Grain].Live, [Grain].Dead, [Shell].Live, [Shell].Dead]
      CompositeBiomass BelowGround: Propertys=[[Root].Live, [Root].Dead, [Nodule].Live, [Nodule].Dead]
      CompositeBiomass Total
        Propertys=[[Leaf].Live, [Leaf].Dead, [Stem].Live, [Stem].Dead, [Grain].Live, [Grain].Dead, [Shell].Live, [Shell].Dead, [Root].Live, [Root].Dead, [Nodule].Live, [Nodule].Dead]
      CompositeBiomass TotalLive
        Propertys=[[Leaf].Live, [Stem].Live, [Grain].Live, [Shell].Live, [Root].Live, [Nodule].Live]
      CompositeBiomass TotalDead
        Propertys=[[Leaf].Dead, [Stem].Dead, [Grain].Dead, [Shell].Dead, [Root].Dead, [Nodule].Dead]
      CompositeBiomass Pod: Propertys=[[Shell].Live, [Shell].Dead, [Grain].Live, [Grain].Dead]
      Memo References
        References

        Brown, H.E., Huth, N.I., Holzworth, D.P., Teixeira, E.I., Zyskowski, R.F., Hargreaves, J.N., Moot, D.J., 2014\. Plant modelling framework: software for building and running crop models on the APSIM platform. Environmental Modelling & Software 62 385-398.

        Robertson, M.J., Carberry, P.S., Huth, N.I., Turpin, J.E., Probert, M.E., Poulton, P.L., Bell, M., Wright, G.C., Yeates, S.J., Brinsmead, R.B., 2002\. Simulation of growth and development of diverse legume species in APSIM. Australian Journal of Agricultural Research 53 429-446.

        Singh P, Virmani SM (1996) Modeling growth and yield of chickpea (Cicer arietinum L.). Field Crops Research , 46, 41-59.
      Cultivar Amethyst
  DataStore
  Simulation ChicorySim: Area=0; Slope=0
    Weather: FileName=Ruakura.met
    Clock: StartDate=1998-01-01; EndDate=1999-05-30
    Summary summaryfile
    SoilArbitrator Soil Arbitrator
    Zone paddockSpecifiedDates: Area=1; Slope=0
      Operations Sowing
        1998-08-29  [Chicory].Sow(population:28, cultivar:"Amethyst", depth:50, rowSpacing:750);
      MicroClimate: a_interception=0; b_interception=1; c_interception=0; d_interception=0; soil_albedo=0.23; air_pressure=1010; soil_emissivity=0.96; sun_angle=15; soil_heat_flux_fraction=0.4; night_interception_fraction=0.5; windspeed_default=3; refheight=2; albedo=0.15; emissivity=0.96; gsmax=0.01; r50=200
      SurfaceOrganicMatter: PoolName=grass; type=grass; mass=0; standing_fraction=0; cpr=0; cnr=80; CriticalResidueWeight=2000; OptimumDecompTemp=20; MaxCumulativeEOS=20; CNRatioDecompCoeff=0.277; CNRatioDecompThreshold=25; TotalLeachRain=25; MinRainToLeach=10; CriticalMinimumOrganicC=0.004; DefaultCPRatio=0; DefaultStandingFraction=0; StandingExtinctCoeff=0.5; FractionFaecesAdded=0.5
        Pools:
          {PoolName=grass, ResidueType=grass, Mass=0, CNRatio=80, CPRatio=0, StandingFraction=0}
        ResidueTypes ResidueTypesList: LoadFromResource=ResidueTypes
      Soil SoilHorotiu: SoilType=0; Site=Horotiu; State=New Zealand; NaturalVegetation=0; ApsoilNumber=0; Latitude=0; Longitude=0; LocationAccuracy=0; DataSource=published soil profile description (as an example)
        InitialWater Initial water: PercentMethod=EvenlyDistributed; FractionFull=0.5
        Water
          Thickness  BD   AirDry  LL15  DUL   SAT
          100        1.1  0.16    0.26  0.42  0.43
          90         1.1  0.16    0.26  0.42  0.43
          60         1.1  0.15    0.2   0.42  0.51
          110        1.1  0.12    0.16  0.37  0.47
          240        1.1  0.12    0.17  0.34  0.43
          110        1.1  0.12    0.16  0.32  0.39
          290        1.1  0.12    0.17  0.32  0.38
          200        1.1  0.12    0.17  0.32  0.38
          300        1.1  0.12    0.17  0.34  0.4
          SoilCrop chicorySoil: LL=[0.26, 0.26, 0.2, 0.16, 0.17, 0.16, 0.17, 0.17, 0.17]; KL=[0.06, 0.06, 0.06, 0.04, 0.02, 0.01, 0, 0, 0]; XF=[1, 1, 1, 1, 1, 1, 0, 0, 0]
          SoilCrop agpasture: LL=[0.26, 0.26, 0.2, 0.16, 0.17, 0.16, 0.17, 0.17, 0.17]; KL=[0.06, 0.06, 0.06, 0.04, 0.02, 0.01, 0, 0, 0]; XF=[1, 1, 1, 1, 1, 1, 0, 0, 0]
          SoilCrop ryegrass: LL=[0.26, 0.26, 0.2, 0.16, 0.17, 0.16, 0.17, 0.17, 0.17]; KL=[0.06, 0.06, 0.06, 0.04, 0.02, 0.01, 0, 0, 0]; XF=[1, 1, 1, 1, 1, 1, 0, 0, 0]
          SoilCrop clover: LL=[0.26, 0.26, 0.2, 0.16, 0.17, 0.16, 0.17, 0.17, 0.17]; KL=[0.06, 0.06, 0.06, 0.04, 0.02, 0.01, 0, 0, 0]; XF=[1, 1, 1, 1, 1, 1, 0, 0, 0]
          SoilCrop chickpea: LL=[0.26, 0.26, 0.2, 0.16, 0.17, 0.16, 0.17, 0.17, 0.17]; KL=[0.06, 0.06, 0.06, 0.04, 0.02, 0.01, 0, 0, 0]; XF=[1, 1, 1, 1, 1, 1, 0, 0, 0]
        SoilWater: residueinterception=0; SummerDate=1-Nov; SummerU=6; SummerCona=3.5; WinterDate=1-apr; WinterU=2; WinterCona=2; DiffusConst=88; DiffusSlope=35; Salb=0.13; CN2Bare=73; CNRed=20; CNCov=0.8; max_pond=0; Thickness=[100, 90, 60, 110, 240, 100, 300, 200, 300]; SWCON=[0.5, 0.5, 0.5, 0.5, 0.8, 0.8, 0.8, 0.9, 0.9]
        SoilNitrogen: fom_type=[default, manure, mucuna, lablab, shemp, stable]; fract_carb=[0.2, 0.3, 0.54, 0.57, 0.45, 0]; fract_cell=[0.7, 0.3, 0.37, 0.37, 0.47, 0.1]; fract_lign=[0.1, 0.4, 0.09, 0.06, 0.08, 0.9]; wfpsN2N2O_x=[22, 88]; wfpsN2N2O_y=[0.1, 1]
        SoilOrganicMatter: RootCN=40; RootWt=800; SoilCN=11.3; EnrACoeff=7.4; EnrBCoeff=0.2; OCUnits=Total
          Thickness  OC   FBiom  FInert
          100        8.2  0.08   0.3
          90         8.2  0.06   0.4
          60         5.5  0.04   0.5
          110        3.3  0.02   0.5
          240        1.7  0.02   0.8
          110        1.7  0.01   0.9
          290        1.2  0.01   1
          200        0.7  0      1
          300        0.1  0      1
        Analysis: Thickness=[100, 200, 300, 300, 300, 300, 300]; PH=[5.9, 6, 6, 6, 6, 6, 6]; PHUnits=Water; BoronUnits=HotWater
        Sample Initial nitrogen: NO3Units=ppm; NH4Units=ppm; SWUnits=Volumetric; OCUnits=Total; PHUnits=Water
          Thickness  NO3      NH4
          100        7.61905  0.132451
          200        7.27008  0.132451
          300        3.87147  0.132451
          300        3.84025  0.132451
          300        3.80952  0.132451
          300        3.77929  0.132451
          300        3.6914   0.132451
      Plant Chicory: CropType=Chickpea
      Report Outputfile: EventNames=[Clock].DoReport
        VariableNames:
          [Clock].Today
          [Chicory].AboveGround.Wt
          [Chicory].Leaf.LAI
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