Simulations: Version=159
  Memo TitlePage
    # The APSIM Cotton Model

    The APSIM Cotton model has been developed using the Plant Modelling Framework (PMF) of [brown_plant_2014]. This new framework provides a library of plant organ and process submodels that can be coupled, at runtime, to construct a model in much the same way that models can be coupled to construct a simulation. This means that dynamic composition of lower level process and organ classes (e.g. photosynthesis, leaf) into larger constructions (e.g. maize, wheat, sorghum) can be achieved by the model developer without additional coding.

    The model consists of:

    * a phenology model to simulate development between growth phases
    * a structure model to simulate plant morphology
    * a collection of organs to simulate the various plant parts
    * an arbitrator to allocate resources (N, biomass) to the various plant organs
  Memo
    **PHENOLOGY**

    1. Run BollFilling phase on [Phenology].ThermalTime
    2. Add *Cutout* phase where FRG=CGR
    3. At *Maturity* --> crop defoliation
    3. Add a *Ripening* phase, or harvest crop (*ReadyForHarvesting*) when LAI <0.2

    **LEAF**

    1. Three phases of leaf growth: preSquaring, StartSquaring to Cutout, and post Cutout
    2. Canopy growth should go steeper from *StartSquaring* to *Cutout*. There seems to be a lag
    3. Leaf biomass and LAI too low. Seems to be very sensitive to leaf growth DMDemand after *Cutout*: [Leaf].DMDemands.Structural.DeltaLAIPotential.AfterCutout.RelativeArea
    4. As fruitload increases, node production slows down and eventually stops. Incorporate this mechanism in [Leaf].NodeNumber --> Develop variable [Leaf].FruitLoad, and [Leaf].RatioFGR_CGR
    5. [Leaf].DMDemands.Structural.DeltaLAIPotential.PreCutout.Delta.RelativeArea needs more attention

    **FRUIT**

    1. Check potential harvest index --> should this be a function of **FruitLoad** since this grows larger after cutout?

    **ROOT**

    1. [Root].RootFrontVelocity --> function of water, texture (soil compaction), and temperature?
    2. Root growth is rapid during the early part of the season and acts as the major sink for photosynthate until flowering and early boll development --> Root growth in 3 phases: PreEmergence, Early (Emergence to Cutout) and Late (Cutout to Maturity)

    **ALL PLANT COMPONENTS**

    1. DM accumulation is set to *Cutout* for all structures but fruit, so currently underpredicted since the this phase is not set up correctly and should continue on longer than predicted

    **SIMULATIONS**

    1. I am unsure if the simulations of the work I was not involved in are set up correctly. Particularly the furrow irrigated simulations in Narrabri and the Burdekin
    2. Crop development too rapid in KRS19RF. This crop was stressed a lot
    3. HRF20: management errors including early PIX applications --> poor crop development and early maturity
    4. Northern Territory sites: large inter-plot variability in LAI (see submitted paper to Eur.J.Ag)
  Folder Replacements
    Report DailyReport: EventNames=[Clock].DoReport
      VariableNames:
        [Clock].Today
        [Clock].Today.DayOfYear
        [Weather].MeanT
        [Weather].Radn
        [Weather].MaxT
        [Weather].MinT
        [Cotton].DaysAfterSowing
        [Cotton].Phenology.Stage
        [Cotton].Phenology.ThermalTime
        [Cotton].Arbitrator.DM.TotalFixationSupply
        sum([Cotton].Arbitrator.N.Fixation) as NFixed
        [Cotton].Arbitrator.DM.TotalPlantDemand
        [Cotton].Phenology.CurrentStageName
        [Cotton].Phenology.Photoperiod
        [Cotton].AboveGround.Wt
        [Cotton].AboveGround.N
        [Cotton].Leaf.NodeNumber
        [Cotton].Leaf.Fw
        [Cotton].Leaf.Fn
        [Cotton].Leaf.Photosynthesis.FT
        [Cotton].Leaf.LAI
        [Cotton].Leaf.CoverGreen
        [Cotton].Leaf.CoverTotal
        [Cotton].Leaf.Live.Wt
        [Cotton].Leaf.Live.StructuralWt
        [Cotton].Leaf.Live.MetabolicWt
        [Cotton].Leaf.Allocated.MetabolicWt
        [Cotton].Leaf.Allocated.StructuralWt
        [Cotton].Leaf.Dead.StructuralWt
        [Cotton].Leaf.Dead.MetabolicWt
        [Cotton].Leaf.Live.N
        [Cotton].Leaf.Live.NConc
        [Cotton].Leaf.Dead.Wt
        [Cotton].Leaf.Dead.N
        [Cotton].Leaf.Dead.NConc
        [Cotton].Leaf.SpecificArea
        [Cotton].Leaf.Wt
        [Cotton].Leaf.Nconc
        [Cotton].Leaf.Senesced.Wt
        [Cotton].Stem.Wt
        [Cotton].Stem.Total.StructuralWt
        [Cotton].Stem.Live.StructuralWt
        [Cotton].Stem.Live.StructuralN
        [Cotton].Stem.N
        [Cotton].Stem.Nconc
        [Cotton].Fruit.Wt
        [Cotton].Fruit.N
        [Cotton].Fruit.Nconc
        [Cotton].Fruit.HarvestIndex
        [Cotton].Root.Wt
        [Cotton].Root.Depth
        [Cotton].Phenology.EmergenceDAS
        [Cotton].Phenology.SquaringDAS
        [Cotton].Phenology.FloweringDAS
        [Cotton].Phenology.OpenbollsDAS
        [Cotton].Phenology.MaturityDAS
        [Cotton].Leaf.Tallness
        [Cotton].Leaf.Height
        [Soil].Water.Volumetric[1:3]
        sum([Soil].SoilWater.ESW) as TotalESW
        sum([Soil].NO3.kgha) as TotalSoilNO3
        sum([Soil].NH4.kgha) as TotalSoilNH4
        sum([Soil].Water.MM) as TotalSW
        sum([Soil].NO3.ppm) as NO3
        sum([Soil].NH4.ppm) as NH4
        [Soil].Water.Volumetric
        sum([Soil].Water.Volumetric) as TotalSWC
        [Cotton].Fruit.Wt
        [Cotton].Fruit.Allocated.Wt
        [Cotton].Leaf.RadiationIntercepted
        [Cotton].AboveGroundLive.Wt
        [Cotton].Fruit.LiveFWt
        [Cotton].Phenology.GrowthRateScript.Script.AboveGroundLiveYesterday
        [Cotton].Phenology.GrowthRateScript.Script.FruitYesterday
        [Cotton].Phenology.GrowthRate.CGR
        [Cotton].Phenology.GrowthRate.FGR
        [Cotton].Phenology.Cutout
        [Cotton].Phenology.Cutout.EndOfDayFunction.CT
    Report HarvestReport: EventNames=[Cotton].Harvesting
      VariableNames:
        [Clock].Today
        [Cotton].Phenology.CurrentStageName
        [Cotton].Phenology.EmergenceDAS
        [Cotton].Phenology.SquaringDAS
        [Cotton].Phenology.FloweringDAS
        [Cotton].Phenology.OpenbollsDAS
        [Cotton].Phenology.MaturityDAS
        [Cotton].AboveGround.Wt
        [Cotton].Fruit.Wt
    Plant Cotton: PlantType=Soybean; IsEnding=false; DaysAfterEnding=0
      Memo
        In soybean, grain is the seed and shell is the pod wall.

        We could retain the grain as the seed, and rename the shell to the lint.  The overall pod could be renamed to boll or something.

        ==============

        Reproductive phase in cotton is from 1st square (StartSquaring)
      OrganArbitrator Arbitrator
        BiomassTypeArbitrator DMArbitration
          Folder PotentialPartitioningMethods
            ReallocationMethod
            AllocateFixationMethod
            RetranslocationMethod
            SendPotentialDMAllocationsMethod
          Folder AllocationMethods
            NutrientConstrainedAllocationMethod
            DryMatterAllocationsMethod
          RelativeAllocation ArbitrationMethod
        BiomassTypeArbitrator NArbitration
          Folder PotentialPartitioningMethods
            ReallocationMethod
          Folder ActualPartitioningMethods
            AllocateFixationMethod
            RetranslocationMethod
          Folder AllocationMethods
            NitrogenAllocationsMethod
          RelativeAllocation ArbitrationMethod
          AllocateUptakesMethod
        WaterUptakeMethod
        NitrogenUptakeMethod
      Phenology
        Memo
          **PHENOLOGY**

          The following crop phases are distinguished:

          Phase number | Phase Name | Initial Stage | Final stage
          -------------|------------|---------------|------------
          1 | Germinating | Sowing | Germination
          2 | Emerging | Germination | Emergence
          3 | PreSquaring | Emergence | StartSquaring
          4 | Squaring | StartSquaring | StartFlowering
          5 | Flowering | StartFlowering | StartBollFilling
          6 | BollFilling | StartBollFilling | StartOpenBolls
          7 | Maturing | StartOpenBolls | Maturity
          8 | ReadyForHarvesting | Maturity | HarvestRipe

          In the flowering phase **cutout** occurs when the growth rate of the fruit (FGR) = growth rate of shoot (CGR)

          The BollFilling phase can be apportioned in separate phases if needed (APSIM-OZCOT).
          See also:

          * *Hearn, A.B., 1994. OZCOT: A Simulation Model for Cotton Crop Management. Agric. Syst., 44: 257–299.*

          Phase number | Phase Name | Initial Stage | Final stage | Target
          -------------|------------|---------------|-------------|--------
          5 | Flowering | StartFlowering | StartEarlyBollDevelopment | FractionofBollFilling = 0.07
          6 | EarlyBollFilling | StartEarlyBollDevelopment | StartMidBollDevelopment | FractionofBollFilling = 0.21
          7 | MidBollFilling | StartMidBollDevelopment | StartLateBollDevelopment | FractionofBollFilling = 0.33
          8 | LateBollFilling | StartLateBollDevelopment | EndBollDevelopment | FractionofBollFilling = 0.55
          9 | EndBollFilling | EndBollDevelopment | StartOpenBolls | EntireBollFillPeriod = 400 DD
          10 | Maturing | StartOpenBolls | Maturity |
        HourlyInterpolation ThermalTime: agregationMethod=0
          Memo
            Base temperature of 15.6 oC and optimum temperature of 32 oC taken from:

            * *Bange, M. et al., 2022. Improving temperature‐based predictions of the timing of flowering in cotton. Agron. J., 114(5): 2728-2742.*

            U.S. Approach with:

            Squaring target - 343 DD (from planting)

            Flowering target - 584 DD (from planting)
          XYPairs Response: X=[15.6, 32, 43, 45]; Y=[0, 16.4, 16.4, 0]
          ThreeHourSin InterpolationMethod
        HourlyInterpolation TT_BollFilling: agregationMethod=0
          Memo
            Base temperature of 17.0 oC provided the best adjusted r2 of all single-variable models.
            Best model using both upper and lower temperature thresholds was DD3017, using 30 and 17 oC as the thresholds

            * *Viator, R.P., Nuti, R.C., Edmisten, K.L. and Wells, R., 2005. Predicting cotton boll maturation period using degree days and other climatic factors. Agron. J., 97(2): 494-499.*

            ======================================

            **Link Boll filling to [Phenology].ThermalTime instead?**
          XYPairs Response: X=[17, 30]; Y=[0, 13]
          ThreeHourSin InterpolationMethod
        PhotoperiodFunction Photoperiod: Twilight=0; DayLength=0
        Manager GrowthRateScript
```csharp
using Models.PMF.Phen;
using APSIM.Shared.Utilities;
using System.Xml.Serialization;
using Models;
using Models.PMF;
using Models.PMF.Organs;
using Models.Soils;
using System.Text;
using System.Collections.Generic;
using Models.Core;
using System;
using Models.Soils.Nutrients;

namespace Models
{
    [Serializable] 
    public class Script : Model
    {
        [Link] private Plant Cotton;
        [Link] private CompositeBiomass AboveGroundLive;
        [Link] private ReproductiveOrgan Fruit;
 		public double AboveGroundLiveYesterday {get; set;}                  
 		public double FruitYesterday {get; set;}    
        
        [EventSubscribe("StartOfSimulation")]
        private void OnSimulationCommencing(object sender, EventArgs e)
        {
        AboveGroundLiveYesterday = 0;
        FruitYesterday = 0;
        }
        
        [EventSubscribe("StartOfDay")]
        private void OnDoManagement(object sender, EventArgs e)
        {
				AboveGroundLiveYesterday = AboveGroundLive.Wt; 
				FruitYesterday = Fruit.LiveFWt;
        }
    }
}
```
        PhaseLookup GrowthRate
          PhaseLookupValue CGR: Start=Emergence; End=HarvestRipe
            SubtractFunction
              VariableReference AboveGroundToday: VariableName=[Cotton].AboveGroundLive.Wt
              VariableReference AboveGroundYesterday
                VariableName=[Cotton].Phenology.GrowthRateScript.Script.AboveGroundLiveYesterday
          PhaseLookupValue FGR: Start=Emergence; End=HarvestRipe
            SubtractFunction
              VariableReference FruitToday: VariableName=[Cotton].Fruit.LiveFWt
              VariableReference FruitYesterday: VariableName=[Cotton].Phenology.GrowthRateScript.Script.FruitYesterday
        LessThanFunction Cutout
          VariableReference If_CGR: VariableName=[Phenology].GrowthRate.CGR
          VariableReference IsLessThanFGR: VariableName=[Phenology].GrowthRate.FGR
          Constant Return_One: FixedValue=1
          VariableReference elseReturn_Zero: VariableName=[Phenology].Cutout.elseReturn_Zero.Zero
            Constant Zero: FixedValue=0
          EndOfDayFunction
            VariableReference CT: VariableName=[Phenology].Cutout
        GerminatingPhase Germinating: Start=Sowing; End=Germination
        EmergingPhase Emerging: Start=Germination; End=Emergence; TTForTimeStep=0
          VariableReference ThermalTime: VariableName=[Phenology].ThermalTime
          AddFunction Target
            Constant ShootLag: FixedValue=10
            MultiplyFunction DepthxRate
              VariableReference SowingDepth: VariableName=[Plant].SowingData.Depth
              Constant ShootRate: FixedValue=1
        GenericPhase PreSquaring: Start=Emergence; End=StartSquaring
          SubtractFunction Target
            Constant SquaringTT: FixedValue=343
            VariableReference Emerging: VariableName=[Phenology].Emerging.Target
          VariableReference Progression: VariableName=[Phenology].ThermalTime
        GenericPhase Squaring: Start=StartSquaring; End=StartFlowering
          SubtractFunction Target
            Constant FloweringTT: FixedValue=584
            VariableReference Emerging: VariableName=[Phenology].Emerging.Target
            VariableReference PreSquaring: VariableName=[Phenology].PreSquaring.Target
          VariableReference Progression: VariableName=[Phenology].ThermalTime
        GenericPhase Flowering1: Start=StartFlowering; End=Cutout
          ExpressionFunction Target: Expression=[GrowthRate].CGR < [GrowthRate].FGR
          VariableReference Progression
        GenericPhase Flowering2: Start=Cutout; End=StartBollFilling
          SubtractFunction Target
            Constant BollFillingTT: FixedValue=140
            VariableReference Flowering1: VariableName=[Phenology].Flowering1.Target
          VariableReference Progression: VariableName=[Phenology].ThermalTime
        GenericPhase BollFilling: Start=StartBollFilling; End=StartOpenBolls
          SubtractFunction Target
            Constant EntireBollFillPeriod: FixedValue=540
            VariableReference Flowering1: VariableName=[Phenology].Flowering1.Target
            VariableReference Flowering2: VariableName=[Phenology].Flowering2.Target
          VariableReference Progression: VariableName=[Phenology].TT_BollFilling
        GenericPhase Maturing: Start=StartOpenBolls; End=Maturity
          Memo
            The timing of maturity of the genotypes was well related to the time when the FGR increased to be equal to the CGR:

            60% bolls open (maturity) = 0.81 x DAS(FGR=CGR (cutout)) + 0.73

            * *Bange, M.P. and Milroy, S.P., 2004. Growth and dry matter partitioning of diverse cotton genotypes. Field Crops Res., 87(1): 73-87.*
          Constant Target: FixedValue=50
          VariableReference Progression: VariableName=[Phenology].ThermalTime
        EndPhase ReadyForHarvesting: Start=Maturity; End=HarvestRipe
          VariableReference ThermalTime: VariableName=[Phenology].ThermalTime
        OnEventFunction EmergenceDAS: SetEvent=Emergence; ReSetEvent=never
          Memo
            A function is used to provide emergence date as days after sowing(DAS).
          Constant PreEventValue: FixedValue=0
          VariableReference PostEventValue: VariableName=[Plant].DaysAfterSowing
        OnEventFunction SquaringDAS: SetEvent=StartSquaring; ReSetEvent=never
          Memo
            A function is used to provide squaring date as days after sowing(DAS).
          Constant PreEventValue: FixedValue=0
          VariableReference PostEventValue: VariableName=[Plant].DaysAfterSowing
        OnEventFunction FloweringDAS: SetEvent=StartFlowering; ReSetEvent=never
          Memo
            A function is used to provide flowering date as days after sowing(DAS).
          Constant PreEventValue: FixedValue=0
          VariableReference PostEventValue: VariableName=[Plant].DaysAfterSowing
        OnEventFunction OpenbollsDAS: SetEvent=StartOpenBolls; ReSetEvent=never
          Memo
            A function is used to provide flowering date as days after sowing(DAS).
          Constant PreEventValue: FixedValue=0
          VariableReference PostEventValue: VariableName=[Plant].DaysAfterSowing
        OnEventFunction MaturityDAS: SetEvent=Maturity; ReSetEvent=never
          Memo
            A function is used to provide maturity date as days after sowing(DAS).
          Constant PreEventValue: FixedValue=0
          VariableReference PostEventValue: VariableName=[Plant].DaysAfterSowing
      SimpleLeaf Leaf: Albedo=0.25; Gsmax350=0.015; R50=150; LeafInitialisationStage=Emergence; Height=0; BaseHeight=0; Width=0; FRGR=0; PotentialEP=0; WaterDemand=0; KDead=0.2; LAIDead=0
        Memo
          Canopy growth should go steeper in begin phases. There seems to be a lag?
        RUEModel Photosynthesis
          Constant RUE: FixedValue=2.5
            Memo
              Values for RUE:

              **TABLE 22.1**

              * *Snider, J., Bange, M. and Heitholt, J., 2021. Chapter 22. Cotton. In: V.O. Sadras and D.F. Calderini (Editors), Crop Physiology. Case Histories for Major Crops, pp. 715-746.*

              Cotton root system may constitute 20-25% of the crop dry matter increase for part of the season:
              * *Bland, W.L. and Dugas, W.A., 1989. Cotton Root Growth and Soil Water Extraction. Soil Sci. Soc. Am. J., 53: 1850-1855.*
          WeightedTemperatureFunction FT: MaximumTemperatureWeighting=0.5
            Memo
              Combing data from:

              **FIG. 2**

              * *Conaty, W.C., Burke, J.J., Mahan, J.R., Neilsen, J.E. and Sutton, B.G., 2012. Determining the Optimum Plant Temperature of Cotton Physiology and Yield to Improve Plant-Based* Irrigation Scheduling. Crop Sci., 52(4): 1828-1836.

              **FIG. 22.4**

              * *Constable, G.A. and Bange, M.P., 2015. The yield potential of cotton (Gossypium hirsutum L.). Field Crops Res., 182: 98-106.*

              Using a base temp of 10 oC
            XYPairs: X=[10, 30, 35, 45]; Y=[0, 1, 1, 0]
          LinearInterpolationFunction FVPD
            Memo
              Photosynthesis was relatively insensitive to VPD as it decreased on average only 13% (SD = 5.0, n = 42) from the maximum photosynthetic rate over a wide range of VPD (1 kPa~4 kPa)

              **FIG. 2C**

              * *Duursma, R.A. et al., 2013. Near-optimal response of instantaneous transpiration efficiency to vapour pressure deficit, temperature and [CO2] in cotton (Gossypium hirsutum L.). Agric. For. Meteorol., 168: 168-176.*
            XYPairs: X=[0, 10, 40]; Y=[1, 1, 0.87]
            VariableReference XValue: VariableName=[Leaf].Photosynthesis.VPD
          LinearInterpolationFunction FN
            XYPairs: X=[0, 1, 1.5]; Y=[0, 1, 1]
            VariableReference XValue: VariableName=[Leaf].Fn
          LinearInterpolationFunction FW
            XYPairs: X=[0, 1]; Y=[0, 1]
            VariableReference XValue: VariableName=[Leaf].Fw
          RUECO2Function FCO2: PhotosyntheticPathway=C3
          VariableReference RadnInt: VariableName=[Leaf].RadiationIntercepted
        StomatalConductanceCO2Modifier
          VariableReference PhotosynthesisCO2Modifier: VariableName=[Leaf].Photosynthesis.FCO2
        MultiplyFunction Area
          VariableReference SLA: VariableName=[Leaf].SpecificArea
          VariableReference LeafLiveWt: VariableName=[Leaf].Live.Wt
        MinimumFunction FRGR
          VariableReference RUE_FT: VariableName=[Leaf].Photosynthesis.FT
          VariableReference RUE_FN: VariableName=[Leaf].Photosynthesis.FN
          VariableReference RUE_FVPD: VariableName=[Leaf].Photosynthesis.FVPD
        LinearInterpolationFunction ExtinctionCoefficient
          Memo
            Extinction coefficients (k) and RUE:

            UNR (25 cm): k=0.81 / RUE=1.03

            Conventionally spaced (1 m): k=0.69 / RUE=1.23

            **TABLE 1**

            * *Brodrick, R., Bange, M.P., Milroy, S.P. and Hammer, G.L., 2013. Physiological determinants of high yielding ultra-narrow row cotton: Canopy development and radiation use efficiency. Field Crops Res., 148: 86-94.*
          XYPairs: X=[250, 1000]; Y=[0.81, 0.69]
          VariableReference XValue: VariableName=[Cotton].SowingData.RowSpacing
        LinearInterpolationFunction Tallness
          Memo
            In APSIM-OZCOT, height is based off stem weight if have XY pairs on observed data (see also chickpea example).

            In *Zhang, L. et al., 2021. Development and validation of SUCROS-Cotton: a potential crop growth simulation model for cotton. NJAS: Wageningen Journal of Life Sciences, 56(1-2): 59-83.*

            --> Plant height is modelled as a linear function of (T) until growth is terminated by removal of the top bud ('cut-out')

            --> Final plant height is also a function of the extension of main stem nodes

            I used XY pairs from *CottonObserved 20230124.xlsx*
          XYPairs: X=[0, 50, 100, 150, 200, 250, 300]; Y=[10, 540, 750, 950, 1165, 1380, 1580]
          VariableReference XValue: VariableName=[Stem].Wt
          XYPairs XYPairs_phenology (disabled): X=[1, 2, 3, 4, 5, 6, 12]; Y=[0, 0, 50, 450, 900, 1300, 1300]
          VariableReference XValue_phenology (disabled): VariableName=[Phenology].Stage
        LinearInterpolationFunction FruitLoad (disabled)
          XYPairs: X=[0, 1]; Y=[1, 0]
          VariableReference XValue: VariableName=[Leaf].RatioFGR_CGR
        PhaseLookup RatioFGR_CGR (disabled)
          PhaseLookupValue preCutout: Start=StartSquaring; End=Cutout
            BoundFunction
              Constant Lower: FixedValue=0
              Constant Upper: FixedValue=1
              ExpressionFunction: Expression=[Phenology].GrowthRate.FGR/[Phenology].GrowthRate.CGR
          PhaseLookupValue PostCutout: Start=Cutout; End=HarvestRipe
            Constant: FixedValue=1
        Constant Phyllochron: FixedValue=40
          Memo
            From squaring, as fruit load increases, phyllochron decreases until cutout = 0

            So distinguish in 2 phases: preSquaring (constant - Thermal Time), and postSquaring (Thermal Time x metabolic stress feedback)
        AddFunction NodeNumber
          Memo
            Node production as function of day degree accumulation.

            Need to add a term that provides negative feedback from metabolic stress (as fruit load increases and cutout is reached), eventually halting node (in Hearn, 1994: node = site) production.

            Stage name to stop accumulation set on **cutout**
          Constant Initial: FixedValue=0
          AccumulateFunction Change: StartStageName=Emergence; EndStageName=StartBollFilling; FractionRemovedOnCut=1; FractionRemovedOnHarvest=1; FractionRemovedOnGraze=1; FractionRemovedOnPrune=0
            DivideFunction DeltaNode
              VariableReference ThermalTime: VariableName=[Phenology].ThermalTime
              VariableReference Phyllochron: VariableName=[Leaf].Phyllochron
        MultiplyFunction NodeNumber2 (disabled)
          VariableReference Nodes: VariableName=[Leaf].NodeNumber2
          VariableReference FruitLoad: VariableName=[Leaf].FruitLoad
        Constant NReallocationFactor: FixedValue=1
          Memo
            This model assumes that all metabolic and storage N is available for reallocation from senescing leaves.
        PhaseLookup SenescenceRate
          Memo
            1. *Leaf senescence rate is calculated to ensure that all leaves are senesced by crop maturity.*
            2. *There is no data on detachment rates and so a simple value was chosen to ensure that leaves were not retained in the canopy. In the future, with more data available a thermal time basis leaf detachment rate will be explored.*

            In Hearn (1994), leaf senescence ((-)/d) is a function of:
            1. Boll load,
            2. Water stress (FW, see Mungbean example), and
            3. Thermal Time (AgeDrivenSenescenceRate, see Mungbean example) (and is accelerated after defoliation).

            **SUGGESTION**

            Add one phase and add interaction with boll load that accelerates after cutout?
          PhaseLookupValue BeforeCutout: Start=Emergence; End=Cutout
            Constant Rate: FixedValue=0
          PhaseLookupValue AfterCutout: Start=Cutout; End=Maturity
            DivideFunction Rate
              VariableReference TT: VariableName=[Phenology].ThermalTime
              VariableReference TT1: VariableName=[Phenology].TT_BollFilling
              SubtractFunction TTRemaining
                ExpressionFunction TTRequired
                  Expression=[Phenology].BollFilling.Target + [Phenology].Maturing.Target
                ExpressionFunction TTComplete
                  Expression=[Phenology].BollFilling.ProgressThroughPhase + [Phenology].Maturing.ProgressThroughPhase
        Constant DetachmentRate: FixedValue=0.05; Units=/d
        Constant InitialWt: FixedValue=1
        MultiplyFunction LAIDead
          VariableReference SLA: VariableName=[Leaf].SpecificArea
          VariableReference LeafDeadWt: VariableName=[Leaf].Dead.Wt
        LinearInterpolationFunction MaximumNConc
          Memo
            These values have been fitted to the data from Tim Weavers Nitrogen trial. Value for Phenology.Stage 3 estimated.

            Y values were all from the N300 treatment

            Cotton.Phenology.Stage | Cotton.Phenology.CurrentStageName
            -----------------------|----------------------------------
            1 | Sowing
            2 | Germination
            3 | Emergence
            4 | StartSquaring
            5 | StartFlowering
            6 | Cutout
            7 | StartBollFilling
            8 | StartOpenBolls
            9 | Maturity
          XYPairs: X=[3, 6, 8, 9]; Y=[0.05, 0.042, 0.036, 0.033]
          VariableReference XValue: VariableName=[Phenology].Stage
        LinearInterpolationFunction CriticalNConc
          XYPairs: X=[3, 6, 8, 9]; Y=[0.05, 0.042, 0.036, 0.033]
          VariableReference XValue: VariableName=[Phenology].Stage
        Constant MinimumNConc: FixedValue=0.025
          Memo
            Tim Weavers Nitrogen trial

            N concentration at maturity for N0 treatment = 0.025
        Constant MaintenanceRespiration: FixedValue=0; Units=0-1
        Constant DMConversionEfficiency: FixedValue=1; Units=0-1
        BiomassRemoval BiomassRemovalDefaults
          OrganBiomassRemovalType Harvest: FractionLiveToRemove=0; FractionDeadToRemove=0; FractionLiveToResidue=1; FractionDeadToResidue=1
          OrganBiomassRemovalType Cut: FractionLiveToRemove=0; FractionDeadToRemove=0; FractionLiveToResidue=1; FractionDeadToResidue=1
        Constant NRetranslocationFactor: FixedValue=0.5
        Constant DMReallocationFactor: FixedValue=0
        Constant DMRetranslocationFactor: FixedValue=0
        Constant RemobilisationCost: FixedValue=0
        Constant CarbonConcentration: FixedValue=0.4
        NutrientDemandFunctions DMDemands
          DivideFunction Structural
            PhaseLookup DeltaLAIPotential
              Memo
                DeltaLAI describes the LAI variation over the cycle and is calculated using the Area of Largest Leaf, relative leaf area, plant number, branch number and leaf appearance rate (thermal time/phyllochron).
              PhaseLookupValue PreSquaring: Start=Emergence; End=StartSquaring
                Memo
                  Is *Constant* the relative growth rate?

                  In APSIM-Classic RLAI = 0.01

                  Burdekin data, RLAI also very low, but DDRF_RS trial, very high: 0.05-0.08
                Constant: FixedValue=0.05
              PhaseLookupValue PreCutout: Start=StartSquaring; End=StartBollFilling
                MultiplyFunction Delta
                  VariableReference AreaLargestLeaf: VariableName=[Leaf].AreaLargestLeaf
                  LinearInterpolationFunction RelativeArea
                    Memo
                      Based on the observed data file using LAI and DW live green leaves

                      WAS: 5681624 - 0.1 0.1 0.1 1 1
                    XYPairs: X=[8, 20, 25]; Y=[0.1, 1, 1]
                    VariableReference XValue: VariableName=[Leaf].NodeNumber
                  VariableReference PlantNumber: VariableName=[Cotton].SowingData.Population
                  LinearInterpolationFunction Branches
                    Memo
                      What exactly is this? Number of potential branches per node?

                      In cotton first fruiting branch starts at node 6/7; sometimes 5. Then 1 branch per node

                      LAI is very sensitive to changes of this parameter

                      WAS

                      06789 - 11222
                    XYPairs: X=[0, 6, 30]; Y=[0, 1, 1]
                    VariableReference XValue: VariableName=[Leaf].NodeNumber
                  DivideFunction LAR
                    VariableReference TT: VariableName=[Phenology].ThermalTime
                    VariableReference Phyllochron: VariableName=[Leaf].Phyllochron
              PhaseLookupValue AfterCutout: Start=StartBollFilling; End=HarvestRipe
                Constant RelativeArea: FixedValue=0
                Memo
                  After cutout demand should be zero.

                  LAI and leaf.DW is very sensitive to this value. Changing to 0.1 increases both parameters more than twofold
            VariableReference SLA: VariableName=[Leaf].SpecificArea
            Memo
              Growth in leaf area is used to calculate the leaf dry matter demand. The same was assumed in the original crop models in APSIM. Further model development can be taken once new experimental data for metabolic, structural and storage forms are provided.
            Memo Memo1
              DeltaLAI describes the LAI variation over the cycle and is calculated using the Area of Largest Leaf, relative leaf area, plant number, branch number and leaf appearance rate (thermal time/phyllochron).
          Constant Storage: FixedValue=0
          Constant Metabolic: FixedValue=0
          Constant QStructuralPriority: FixedValue=1
          Constant QMetabolicPriority: FixedValue=1
          Constant QStoragePriority: FixedValue=1
        NutrientDemandFunctions NDemands
          MultiplyFunction Structural
            VariableReference MinNconc: VariableName=[Leaf].minimumNconc
            VariableReference PotentialDMAllocation: VariableName=[Leaf].potentialDMAllocation.Structural
          MultiplyFunction Metabolic
            SubtractFunction MetabolicNconc
              VariableReference CritNconc: VariableName=[Leaf].criticalNConc
              VariableReference MinNconc: VariableName=[Leaf].minimumNconc
            VariableReference PotentialDMAllocation: VariableName=[Leaf].potentialDMAllocation.Structural
          StorageNDemandFunction Storage
            Constant NitrogenDemandSwitch: FixedValue=1
            VariableReference MaxNconc: VariableName=[Leaf].maximumNconc
          Constant QStructuralPriority: FixedValue=1
          Constant QMetabolicPriority: FixedValue=1
          Constant QStoragePriority: FixedValue=1
        LinearInterpolationFunction FrostFraction
          XYPairs: X=[-4, 4]; Y=[1, 0]
          VariableReference XValue: VariableName=[Weather].MinT
        LinearInterpolationFunction SpecificArea2 (disabled)
          Memo
            SLA against light flux density within the canopy

            Since SLA is unlikely to adjust instantaneously to light flux density, we compared each measured SLA with the meain light (PAR) flux density for the previous week:

            SLA = 26.01 - [2.68 x ln(light flux density)]

            * *Reddy, V.R., Acock, B., Baker, D.N. and Acock, M., 1989. Seasonal Leaf Area-Leaf Weight Relationships in the Cotton Canopy. Agron. J., 81(1): 1-4.*
          XYPairs: X=[0, 5]; Y=[0.015, 0.018]
          VariableReference XValue: VariableName=[Leaf].RadiationIntercepted
        LinearInterpolationFunction SpecificArea
          Memo
            From observed data CottonLAI
          XYPairs: X=[0, 6]; Y=[0.015, 0.018]
          VariableReference XValue: VariableName=[Leaf].LAI
        Constant AreaLargestLeaf: FixedValue=0.02
        PhaseLookup RatioFGR_CGR1 (disabled): same as Replacements.Cotton.Leaf.RatioFGR_CGR
      GenericOrgan Stem: IsAboveGround=true
        Memo
          Check N dynamics over time in cotton and partitioning and storage
        Constant NReallocationFactor: FixedValue=1
        Constant NRetranslocationFactor: FixedValue=0.5
        PhaseLookup DMRetranslocationFactor
          PhaseLookupValue BollFilling: Start=Cutout; End=HarvestRipe
            Constant RetranslocationFactor: FixedValue=0.2
        LinearInterpolationFunction MaximumNConc
          Memo
            From Tim Weavers N trial data
          XYPairs: X=[3, 6, 8, 9]; Y=[0.022, 0.016, 0.011, 0.009]
          VariableReference XValue: VariableName=[Phenology].Stage
        Constant MinimumNConc: FixedValue=0.007
        PhaseLookupValue NitrogenDemandSwitch: Start=Emergence; End=Cutout
          Memo
            There is no evidence of stem N storage during grain filling. Also, there is no stem structural growth during this time.
          Constant: FixedValue=1
        BiomassRemoval BiomassRemovalDefaults: same as Replacements.Cotton.Leaf.BiomassRemovalDefaults
        PhaseLookup SenescenceRate
          PhaseLookupValue PostCanopyPhase: Start=Cutout; End=HarvestRipe
            MinimumFunction Rate
              DivideFunction Fraction
                VariableReference TT: VariableName=[Phenology].ThermalTime
                SubtractFunction TTRemaining
                  ExpressionFunction PostCanopyTT: Expression=[Phenology].BollFilling.Target+[Phenology].Maturing.Target
                  ExpressionFunction PostCanopyTTComplete
                    Expression=[Phenology].BollFilling.ProgressThroughPhase+[Phenology].Maturing.ProgressThroughPhase
              Constant One: FixedValue=1
        Constant DetachmentRateFunction: FixedValue=0; Units=/d
        Constant MaintenanceRespirationFunction: FixedValue=0; Units=0-1
        Constant DMConversionEfficiency: FixedValue=1; Units=0-1
        Constant DMReallocationFactor: FixedValue=0
        VariableReference CriticalNConc: VariableName=[Stem].MinimumNConc
        Constant RemobilisationCost: FixedValue=0
        Constant CarbonConcentration: FixedValue=0.4
        NutrientDemandFunctions DMDemands
          MultiplyFunction Structural
            PhaseLookup Fraction
              PhaseLookupValue StemGrowthPhase: Start=Emergence; End=Cutout
                Constant Fraction: FixedValue=1
              PhaseLookupValue BollFilling: Start=Cutout; End=HarvestRipe
                Constant Fraction: FixedValue=0
            VariableReference DMDemand: VariableName=[Stem].PotentialGrowth
          Constant Metabolic: FixedValue=0
          MultiplyFunction Storage
            VariableReference DMDemand: VariableName=[Stem].PotentialGrowth
            SubtractFunction StorageFraction
              Constant One: FixedValue=1
              VariableReference StructuralFraction: VariableName=[Stem].DMDemands.Structural.Fraction
          Constant QStructuralPriority: FixedValue=1
          Constant QMetabolicPriority: FixedValue=1
          Constant QStoragePriority: FixedValue=1
        NutrientDemandFunctions NDemands
          MultiplyFunction Structural
            VariableReference MinNconc: VariableName=[Stem].minimumNconc
            VariableReference PotentialDMAllocation: VariableName=[Stem].potentialDMAllocation.Structural
          MultiplyFunction Metabolic
            SubtractFunction MetabolicNconc
              VariableReference CritNconc: VariableName=[Stem].criticalNConc
              VariableReference MinNconc: VariableName=[Stem].minimumNconc
            VariableReference PotentialDMAllocation: VariableName=[Stem].potentialDMAllocation.Structural
          StorageNDemandFunction Storage
            VariableReference NitrogenDemandSwitch: VariableName=[Stem].nitrogenDemandSwitch
            VariableReference MaxNconc: VariableName=[Stem].maximumNconc
          Constant QStructuralPriority: FixedValue=1
          Constant QMetabolicPriority: FixedValue=1
          Constant QStoragePriority: FixedValue=1
        PartitionFractionDemandFunction PotentialGrowth
          PhaseLookup PartitionFraction
            Memo
              CHECK THIS --> PARTITIONING IN DM STEM BETWEEN PHENOLOGICAL PHASES!

              Stem growth is now set on END StartBollFilling, but should be **CUTOUT** Switch this over once CUTOUT is incorporated in the phenology
            PhaseLookupValue StemGrowthPhase: Start=Emergence; End=Cutout
              Constant StemFraction: FixedValue=1
            PhaseLookupValue BollFilling: Start=Cutout; End=HarvestRipe
              Constant StemFraction: FixedValue=0
        RetranslocateNonStructural RetranslocateNitrogen
        NutrientPoolFunctions InitialWt
          Constant Structural: FixedValue=0; Units=g/m^2
          Constant Metabolic: FixedValue=0
          Constant Storage: FixedValue=0
        Constant Photosynthesis: FixedValue=0
        VariableReference initialNConcFunction: VariableName=[Stem].MinimumNConc
      ReproductiveOrgan Fruit: GrowthRespiration=0; MaintenanceRespiration=0
        Biomass Live
        Biomass Dead
        Memo
          Relationship between final fruit.wt and lint yield?
        Constant PotentialHarvestIndex: FixedValue=0.6
          Memo
            This is the potential ratio of fruit.wt to aboveground.wt

            Max 70%: Tim Weaver Nitrogen trial

            60%: *Pabuayon, I.L.B., Lewis, K.L. and Ritchie, G.L., 2020. Dry matter and nutrient partitioning changes for the past 30 years of cotton production. Agron. J., 112(5): 4373-4385.*

            60%: *Grundy, P.R., Yeates, S.J. and Bell, K.L., 2020. Cotton production during the tropical monsoon season. II – Biomass accumulation, partitioning and RUE in response to boll loss and compensation. Field Crops Res., 255: 107868.*

            Harvest index related to the timing of Maturity and ranged from 0.55-0.66: *Bange, M.P. and Milroy, S.P., 2004. Growth and dry matter partitioning of diverse cotton genotypes. Field Crops Res., 87(1): 73-87.*

            **--> Incorporate function so that HI depends on time to maturity (Bange et al., 2004)**
        AddFunction FillingDuration
          VariableReference SquaringDuration: VariableName=[Phenology].Squaring.Target
          VariableReference Flowering1Duration: VariableName=[Phenology].Flowering1.Target
          VariableReference Flowering2Duration: VariableName=[Phenology].Flowering2.Target
          VariableReference BollFillingDuration: VariableName=[Phenology].BollFilling.Target
        PhaseLookup DMDemandFunction
          PhaseLookupValue BollFilling: Start=StartSquaring; End=HarvestRipe
            MultiplyFunction HIBollDemand
              VariableReference AboveGroundWt: VariableName=[AboveGround].Wt
              DivideFunction HarvestIndexIncrease
                VariableReference PotentialHarvestIndex: VariableName=[Fruit].PotentialHarvestIndex
                VariableReference FillingDuration: VariableName=[Fruit].FillingDuration
              VariableReference ThermalTime: VariableName=[Phenology].TT_BollFilling
        Constant MinimumNConc: FixedValue=0.021
        Constant MaximumNConc: FixedValue=0.035
        Constant WaterContent: FixedValue=0.12
          Memo
            CHECK THIS!
        MultiplyFunction NFillingRate
          VariableReference NConc: VariableName=[Fruit].MaximumNConc
          VariableReference DMDemand: VariableName=[Fruit].DMDemandFunction
          VariableReference DMConversionEfficiency: VariableName=[Fruit].DMConversionEfficiency
        BiomassRemoval BiomassRemovalDefaults
          OrganBiomassRemovalType Harvest: FractionLiveToRemove=1; FractionDeadToRemove=1; FractionLiveToResidue=0; FractionDeadToResidue=0
          OrganBiomassRemovalType Cut: FractionLiveToRemove=0; FractionDeadToRemove=0; FractionLiveToResidue=1; FractionDeadToResidue=1
        Constant DMConversionEfficiency: FixedValue=0.89
        Constant RemobilisationCost: FixedValue=0
        Constant CarbonConcentration: FixedValue=0.4
        DivideFunction HarvestIndex
          VariableReference FruitWt: VariableName=[Fruit].Wt
          VariableReference AboveGroundWt: VariableName=[AboveGround].Wt
        Constant MaximumPotentialBollSize: FixedValue=0
          Memo
            This parameter is not used.  Grain growth is calculated from harvest index increase.
        Constant NumberFunction: FixedValue=0
          Memo
            Grain number is not estimated by this model.
        NutrientPoolFunctions DMDemandPriorityFactors
          Constant Structural: FixedValue=1
          Constant Metabolic: FixedValue=1
          Constant Storage: FixedValue=1
        NutrientPoolFunctions NDemandPriorityFactors: same as Replacements.Cotton.Fruit.DMDemandPriorityFactors
      GenericOrgan Shell (disabled): IsAboveGround=true
        Constant NReallocationFactor: FixedValue=1
        Constant NRetranslocationFactor: FixedValue=0.5
        Constant MaximumNConc: FixedValue=0.045
        VariableReference CriticalNConc: VariableName=[Shell].MinimumNConc
        Constant MinimumNConc: FixedValue=0.01
        Constant DMRetranslocationFactor: FixedValue=0.1
        PhaseLookupValue NitrogenDemandSwitch: Start=StartBollFilling; End=Maturity
          Constant: FixedValue=1
        BiomassRemoval BiomassRemovalDefaults
          OrganBiomassRemovalType Harvest: FractionLiveToRemove=0; FractionDeadToRemove=0; FractionLiveToResidue=1; FractionDeadToResidue=1
          OrganBiomassRemovalType Cut: FractionLiveToRemove=0; FractionDeadToRemove=0; FractionLiveToResidue=1; FractionDeadToResidue=1
        PhaseLookup SenescenceRate
          PhaseLookupValue ReproductivePhase: Start=StartBollFilling; End=Maturity
            MinimumFunction Rate
              DivideFunction Fraction
                VariableReference TT: VariableName=[Phenology].TT_BollFilling
                SubtractFunction TTRemaining
                  ExpressionFunction ReproductiveTT: Expression=[Phenology].BollFilling.Target+[Phenology].Maturing.Target
                  ExpressionFunction ReproductiveTT1Complete
                    Expression=[Phenology].BollFilling.ProgressThroughPhase+[Phenology].Maturing.ProgressThroughPhase
              Constant One: FixedValue=1
        Constant DetachmentRateFunction: FixedValue=0; Units=/d
        Constant MaintenanceRespirationFunction: FixedValue=0; Units=0-1
        Constant DMConversionEfficiency: FixedValue=1; Units=0-1
        Constant DMReallocationFactor: FixedValue=0
        Constant RemobilisationCost: FixedValue=0
        Constant CarbonConcentration: FixedValue=0.4
        Constant PotentialHarvestIndex: FixedValue=0.2
        AddFunction FillingDuration
          VariableReference EarlyBollFillingDuration: VariableName=[Phenology].BollFilling.Target
        NutrientDemandFunctions DMDemands
          MultiplyFunction Structural
            PhaseLookup DMDemandFunction
              PhaseLookupValue BollDevelopment: Start=StartBollFilling; End=Maturity
                MultiplyFunction HIBollDemand
                  VariableReference AboveGroundWt: VariableName=[AboveGround].Wt
                  DivideFunction HarvestIndexIncrease
                    VariableReference PotentialHarvestIndex: VariableName=[Shell].PotentialHarvestIndex
                    VariableReference FillingDuration: VariableName=[Shell].FillingDuration
                  VariableReference ThermalTime: VariableName=[Phenology].ThermalTime
            Constant StructuralFraction: FixedValue=1
            Memo
              Shell harvest index is used to calculate shell biomass demand, which follows the same approach than grain harvest index. It represents the fraction of shell biomass in relation to total aboveground biomass.
          Constant Metabolic: FixedValue=0
          StorageDMDemandFunction Storage
            SubtractFunction StorageFraction
              Constant One: FixedValue=1
              VariableReference StructuralFraction: VariableName=[Shell].DMDemands.Structural.StructuralFraction
          Constant QStructuralPriority: FixedValue=1
          Constant QMetabolicPriority: FixedValue=1
          Constant QStoragePriority: FixedValue=1
        NutrientDemandFunctions NDemands
          MultiplyFunction Structural
            VariableReference MinNconc: VariableName=[Shell].minimumNconc
            VariableReference PotentialDMAllocation: VariableName=[Shell].potentialDMAllocation.Structural
          StorageNDemandFunction Storage
            VariableReference NitrogenDemandSwitch: VariableName=[Shell].nitrogenDemandSwitch
            VariableReference MaxNconc: VariableName=[Shell].maximumNconc
          Constant Metabolic: FixedValue=0
          Constant QStructuralPriority: FixedValue=1
          Constant QMetabolicPriority: FixedValue=1
          Constant QStoragePriority: FixedValue=1
        RetranslocateNonStructural RetranslocateNitrogen
        NutrientPoolFunctions InitialWt
          Constant Structural: FixedValue=0; Units=g/m^2
          Constant Metabolic: FixedValue=0
          Constant Storage: FixedValue=0
        Constant Photosynthesis: FixedValue=0
        VariableReference initialNConcFunction: VariableName=[Shell].MinimumNConc
      Root: GrowthRespiration=0; MaintenanceRespiration=0
        Memo
          *Snider, J., Bange, M. and Heitholt, J., 2021. Chapter 22. Cotton. In: V.O. Sadras and D.F. Calderini (Editors), Crop Physiology. Case Histories for Major Crops, pp. 715-746.*

          from EMERGENCE:

          During this time, the cotton plant exhibits rapid root growth. The primary root may be as much as 25-cm deep by the time the cotyledons unfold, and early season taproot growth proceeds at rates up to 6 cm per day under optimal
          conditions (Oosterhuis, 1990; Ritchie et al., 2007; Snider and Oosterhuis, 2015).

          CANOPY DEVELOPMENT:

          Root growth also continues during early canopy and square development. In fact, the onset of flowering represents a shift in source-sink relations towards greater reproductive growth and a significant reduction in root growth.

          Thus, crop growth before flowering is critical for developing a well-established root system and sufficient canopy to support growth and yield.

          Cotton root growth is rapid during the early part of the season and acts as the major sink for photosynthate until flowering and early boll development.
        MultiplyFunction RootFrontVelocity
          PhaseLookup PotentialRootFrontVelocity
            PhaseLookupValue PreEmergence: Start=Germination; End=Emergence
              Constant Function: FixedValue=5
            PhaseLookupValue early: Start=Emergence; End=Cutout
              Constant Function: FixedValue=25
            PhaseLookupValue late: Start=Cutout; End=Maturity
              Constant Function: FixedValue=17
          LinearInterpolationFunction WaterFactor
            SoilWaterScale
            XYPairs: X=[0, 0.25, 1]; Y=[1, 1, 1]
            VariableReference XValue: VariableName=[SoilWaterScale]
          LinearInterpolationFunction AFPSFactor
            XYPairs: X=[0, 0.03, 1]; Y=[1, 1, 1]
            VariableReference XValue: VariableName=[Root].AirFilledPoreSpace
        Constant MaximumRootDepth: FixedValue=1000000
          Memo
            There is no intrinsic limit to maximum rooting depth.  Roots will be limited by the depth of the soil profile, or via values of XF in each layer.
        RootShapeCylinder RootShape
        Constant KLModifier: FixedValue=1; Units=0-1
          Memo
            No modification to water extraction rate is assumed in this model.
        LinearInterpolationFunction MaxDailyNUptake
          XYPairs: X=[0, 5]; Y=[1, 3]
          VariableReference XValue: VariableName=[Leaf].LAI
        Constant SenescenceRate: FixedValue=0.005; Units=/d
          Memo
            Roots are assumed to simply senesce at a small and constant rate during the entire growth period.
        Constant MaximumNConc: FixedValue=0.01
        Constant MinimumNConc: FixedValue=0.005
        PhaseLookupValue NitrogenDemandSwitch: Start=Emergence; End=Maturity
          Constant: FixedValue=1
        Constant KNO3: FixedValue=0.02
        Constant KNH4: FixedValue=0
          Memo
            The current model version considers only NO3 uptake but NH4 option can be activated by the user . We do not expect activation of NH4 to change total plant N uptake because the nitrification rate (conversion of NH4 to NO3) is very fast in the model. In the future we will re-valuate this.
        BiomassRemoval BiomassRemovalDefaults
          Memo
            Default values for biomass removals for Root are only estimates with no data behind them.
            They are just to consider potential root senescence in response to damage.
          OrganBiomassRemovalType Harvest: FractionLiveToRemove=0; FractionDeadToRemove=0; FractionLiveToResidue=0.2; FractionDeadToResidue=0
          OrganBiomassRemovalType Cut: FractionLiveToRemove=0; FractionDeadToRemove=0; FractionLiveToResidue=0.2; FractionDeadToResidue=0
        LinearInterpolationFunction NUptakeSWFactor
          XYPairs: X=[0, 1]; Y=[0, 1]
          VariableReference XValue: VariableName=[Root].RWC
        Constant SpecificRootLength: FixedValue=60; Units=m/g
          Memo
            Specific root length default from OZCOT = 60000 mm/g
        Constant DMConversionEfficiency: FixedValue=1
        Constant MaintenanceRespirationFunction: FixedValue=1
        Constant RemobilisationCost: FixedValue=0
        Constant CarbonConcentration: FixedValue=0.4
        NutrientDemandFunctions DMDemands
          MultiplyFunction Structural
            PartitionFractionDemandFunction DMDemandFunction
              PhaseLookup PartitionFraction
                PhaseLookupValue Early: Start=Emergence; End=StartSquaring
                  Constant Function: FixedValue=0.2
                PhaseLookupValue Middle: Start=StartSquaring; End=StartBollFilling
                  Constant Function: FixedValue=0.2
                PhaseLookupValue Late: Start=StartBollFilling; End=Maturity
                  Constant Function: FixedValue=0.05
            Constant StructuralFraction: FixedValue=1
          Constant Metabolic: FixedValue=0
          StorageDMDemandFunction Storage
            SubtractFunction StorageFraction
              Constant One: FixedValue=1
              VariableReference StructuralFraction: VariableName=[Root].DMDemands.Structural.StructuralFraction
          Constant QStructuralPriority: FixedValue=1
          Constant QMetabolicPriority: FixedValue=1
          Constant QStoragePriority: FixedValue=1
        NutrientDemandFunctions NDemands
          MultiplyFunction Structural
            VariableReference MinNconc: VariableName=[Root].minimumNconc
            VariableReference PotentialDMAllocation: VariableName=[Root].potentialDMAllocation.Structural
          MultiplyFunction Metabolic
            SubtractFunction MetabolicNconc
              VariableReference CritNconc: VariableName=[Root].criticalNConc
              VariableReference MinNconc: VariableName=[Root].minimumNconc
            VariableReference PotentialDMAllocation: VariableName=[Root].potentialDMAllocation.Structural
          StorageNDemandFunction Storage
            VariableReference NitrogenDemandSwitch: VariableName=[Root].nitrogenDemandSwitch
            VariableReference MaxNconc: VariableName=[Root].maximumNconc
          Constant QStructuralPriority: FixedValue=1
          Constant QMetabolicPriority: FixedValue=1
          Constant QStoragePriority: FixedValue=1
        VariableReference CriticalNConc: VariableName=[Root].MinimumNConc
        NutrientPoolFunctions InitialWt
          Constant Structural: FixedValue=0.2; Units=g/plant
          Constant Metabolic: FixedValue=0
          Constant Storage: FixedValue=0
      CompositeBiomass AboveGround: OrganNames=[Leaf, Stem, Fruit]; IncludeLive=true; IncludeDead=true
      CompositeBiomass BelowGround: OrganNames=[Root]; IncludeLive=true; IncludeDead=true
      CompositeBiomass AboveGroundLive: OrganNames=[Leaf, Stem, Fruit]; IncludeLive=true; IncludeDead=false
      CompositeBiomass FruitLive: OrganNames=[Fruit]; IncludeLive=true; IncludeDead=false
      CompositeBiomass Total: OrganNames=[Leaf, Stem, Fruit, Root]; IncludeLive=true; IncludeDead=true
      CompositeBiomass TotalLive: OrganNames=[Leaf, Stem, Fruit, Root]; IncludeLive=true; IncludeDead=false
      CompositeBiomass TotalDead: OrganNames=[Leaf, Stem, Fruit, Root]; IncludeLive=false; IncludeDead=true
      CompositeBiomass Boll (disabled): OrganNames=[Fruit, Shell]; IncludeLive=true; IncludeDead=true
      Constant MortalityRate: FixedValue=0
      Constant SeedMortalityRate: FixedValue=0
      Folder Cultivars
        Cultivar Cotton_Generic
          Command:
            [Phenology].PreSquaring.Target.SquaringTT.FixedValue = 343
            [Phenology].Squaring.Target.FloweringTT.FixedValue = 584
            [Leaf].AreaLargestLeaf.FixedValue=0.020
        Cultivar Hooper_MG40
          Command:
            [Phenology].PreSquaring.Target.SquaringTT.FixedValue = 343
            [Phenology].Squaring.Target.FloweringTT.FixedValue = 584
            [Leaf].AreaLargestLeaf.FixedValue=0.020
        Cultivar Sicala_60BRF
          Command:
            [Phenology].PreSquaring.Target.SquaringTT.FixedValue = 294
            [Phenology].Squaring.Target.FloweringTT.FixedValue = 583
            [Leaf].AreaLargestLeaf.FixedValue=0.020
        Cultivar Sicala_V2
          Command:
            [Phenology].PreSquaring.Target.SquaringTT.FixedValue = 343
            [Phenology].Squaring.Target.FloweringTT.FixedValue = 584
            [Leaf].AreaLargestLeaf.FixedValue=0.020
        Cultivar Sicot_707B3F
          Command:
            [Phenology].PreSquaring.Target.SquaringTT.FixedValue = 364
            [Phenology].Squaring.Target.FloweringTT.FixedValue = 586
            [Leaf].AreaLargestLeaf.FixedValue=0.020
        Cultivar Sicot_70BRF
          Command:
            [Phenology].PreSquaring.Target.SquaringTT.FixedValue = 314
            [Phenology].Squaring.Target.FloweringTT.FixedValue = 595
            [Leaf].AreaLargestLeaf.FixedValue=0.020
        Cultivar Sicot_714B3F
          Command:
            [Phenology].PreSquaring.Target.SquaringTT.FixedValue = 350
            [Phenology].Squaring.Target.FloweringTT.FixedValue = 549
            [Leaf].AreaLargestLeaf.FixedValue=0.020
        Cultivar Sicot_71B
          Command:
            [Phenology].PreSquaring.Target.SquaringTT.FixedValue = 394
            [Phenology].Squaring.Target.FloweringTT.FixedValue = 591
            [Leaf].AreaLargestLeaf.FixedValue=0.020
        Cultivar Sicot_746B3F
          Command:
            [Phenology].PreSquaring.Target.SquaringTT.FixedValue = 408
            [Phenology].Squaring.Target.FloweringTT.FixedValue = 626
            [Leaf].AreaLargestLeaf.FixedValue=0.020
        Cultivar Sicot_748B3F
          Command:
            [Phenology].PreSquaring.Target.SquaringTT.FixedValue = 395
            [Phenology].Squaring.Target.FloweringTT.FixedValue = 631
            [Leaf].AreaLargestLeaf.FixedValue=0.020
        Cultivar Sicot_74BRF
          Command:
            [Phenology].PreSquaring.Target.SquaringTT.FixedValue = 314
            [Phenology].Squaring.Target.FloweringTT.FixedValue = 595
            [Leaf].AreaLargestLeaf.FixedValue=0.020
        Cultivar Sicot_80
          Command:
            [Phenology].PreSquaring.Target.SquaringTT.FixedValue = 343
            [Phenology].Squaring.Target.FloweringTT.FixedValue = 584
            [Leaf].AreaLargestLeaf.FixedValue=0.020
        Cultivar Siokra_24BRF
          Command:
            [Phenology].PreSquaring.Target.SquaringTT.FixedValue = 314
            [Phenology].Squaring.Target.FloweringTT.FixedValue = 595
            [Leaf].AreaLargestLeaf.FixedValue=0.020
        Cultivar Stephens_MG40
          Command:
            [Phenology].PreSquaring.Target.SquaringTT.FixedValue = 343
            [Phenology].Squaring.Target.FloweringTT.FixedValue = 584
            [Leaf].AreaLargestLeaf.FixedValue=0.020
  DataStore
    ExcelInput Observed: FileNames=[CottonObserved 20230124.xlsx]; SheetNames=[CottonObserved]
    PredictedObserved: PredictedTableName=DailyReport; ObservedTableName=CottonObserved; FieldNameUsedForMatch=SimulationName; FieldName2UsedForMatch=Clock.Today; AllColumns=false
    PredictedObserved PredictedObservedHarvest: PredictedTableName=HarvestReport; ObservedTableName=CottonObserved; FieldNameUsedForMatch=SimulationName; FieldName2UsedForMatch=SimulationID; AllColumns=false
  Folder Validation
    Memo
      The cotton model has been tested across a range of planting and agronomic conditions.  These include datasets covering a wide range of weather conditions (See graphs that follow) and agronomic factors (irrigation, fertiliser, sowing dates).
    Folder Australia
      Memo
        Where is observed data MyallVale?
      Folder Burdekin (disabled)
        Memo
          These data [Timsina2007] were obtained from a field experiment conducted in 1999–2000 on a Hanwood loam soil at CSIRO Land and Water, Griffith, Australia.  Two indeterminate Cotton cultivars (Hooper and Stephens belonging to late maturity group [MG] 3 or early MG 4) were on 15 November, 8 December, and 6 January.
        Experiment Burdekin2008
          Factors
            Permutation
              Factor Sow
                CompositeFactor Nov15
                  Specifications:
                    [SowingRule].Script.SowingDate=1999-11-15
                    [SowingRule].Script.SowingDepth=50
                    [HarvestRule].Script.HarvestDate=2000-04-06
                CompositeFactor Dec08
                  Specifications:
                    [SowingRule].Script.SowingDate=1999-12-08
                    [SowingRule].Script.SowingDepth=50
                    [HarvestRule].Script.HarvestDate=2000-04-12
                CompositeFactor Jan06
                  Specifications:
                    [SowingRule].Script.SowingDate=2000-01-06
                    [SowingRule].Script.SowingDepth=50
                    [HarvestRule].Script.HarvestDate=2000-04-27
              Factor Cv: Specification=[SowingRule].Script.CultivarName=Hooper_MG40,Stephens_MG40
          Simulation Burdekin2008Base
            Clock: Start=1999-11-10; End=2000-05-31
            Summary summaryfile
            Weather: FileName=Griffith.met
            SoilArbitrator Soil Arbitrator
            MicroClimate: a_interception=0; b_interception=1; c_interception=0; d_interception=0; SoilHeatFluxFraction=0.4; MinimumHeightDiffForNewLayer=0; NightInterceptionFraction=0.5; ReferenceHeight=2
            Zone paddock: Area=1; Slope=0; AspectAngle=0; Altitude=50
              Irrigation
              Manager Automatic irrigation based on water deficit
                FASW = 0
                WaterDeficit = 0
                AutoIrrigationOn = True
                FASWThreshold = 0.9
                FASWDepth = 900
```csharp
using Models.Interfaces;
using APSIM.Shared.Utilities;
using System.Xml.Serialization;
using Models;
using Models.PMF;
using Models.Soils;
using System.Text;
using System.Collections.Generic;
using Models.Core;
using System;
using Models.Soils.Nutrients;

namespace Models
{
    [Serializable] 
    public class Script : Model
    {
        [Link] private Zone zone;
        [Link] private Irrigation irrigation;
        [Link] private Soil soil;
        [Link]
        private IPhysical soilPhysical;
        [Link]
        private ISoilWater waterBalance;
        public double FASW { get; set; }
        public double WaterDeficit  { get; set; }
    
        
        [Description("Auto irrigation on?")]
        public bool AutoIrrigationOn { get; set; }

        [Description("Threshold fraction available water (0-1)")]
        public double FASWThreshold { get; set; }

        [Description("Soil depth (mm) to which fraction available water is calculated")]
        public double FASWDepth { get; set; }

        [EventSubscribe("DoManagement")]
        private void OnDoManagement(object sender, EventArgs e)
        {
            CalculateFASW();
            if (AutoIrrigationOn)
            {
                if (FASW < FASWThreshold)
                {
                    double amount = 10;
                    irrigation.Apply(WaterDeficit, depth: 0);
                }
            }
        }
        
        private void CalculateFASW()
        {
            double[] LL15 = MathUtilities.Multiply(soilPhysical.LL15, soilPhysical.Thickness);
            double[] DUL = MathUtilities.Multiply(soilPhysical.DUL, soilPhysical.Thickness);
        
            int nlayr = GetLayerIndex();
            double cumdep = MathUtilities.Sum(soilPhysical.Thickness, 0, nlayr, 0.0);

            double excess_fr = MathUtilities.Divide((cumdep - FASWDepth), soilPhysical.Thickness[nlayr], 0.0);

            // note that results may be strange if swdep < ll15
            double avail_sw = (MathUtilities.Sum(waterBalance.SWmm, 0, nlayr, 0.0)
                              - excess_fr * waterBalance.SWmm[nlayr])
                              - (MathUtilities.Sum(LL15, 0, nlayr, 0.0)
                              - excess_fr * LL15[nlayr]);


            double pot_avail_sw = (MathUtilities.Sum(DUL, 0, nlayr, 0.0)
                                  - excess_fr * DUL[nlayr])
                                  - (MathUtilities.Sum(LL15, 0, nlayr, 0.0)
                                  - excess_fr * LL15[nlayr]);

            FASW = MathUtilities.Divide(avail_sw, pot_avail_sw, 0.0);
            WaterDeficit = MathUtilities.Constrain(pot_avail_sw - avail_sw, 0.0, 100000);
        }

        private int GetLayerIndex()
        {
            double[] cumThickness = soilPhysical.ThicknessCumulative;
            for (int i = 1; i < cumThickness.Length; i++)
            {
                if (FASWDepth < cumThickness[i])
                    return i - 1;
            }
            
            return cumThickness.Length - 1;
        }

    }
}
```
              Fertiliser
              SurfaceOrganicMatter: InitialResidueName=maize; InitialResidueType=maize; InitialResidueMass=4500; InitialStandingFraction=0; InitialCPR=0; InitialCNR=55
              Manager SowingRule
                RowSpacing = 760
                SowingDepth = 50
                SowingRate = 30
                CultivarName = Cotton_Generic
                SowingDate = 06/10/2001 00:00:00
```csharp
using Models.Soils;
using System;
using Models.Core;
using Models.PMF;
using APSIM.Shared.Utilities;
        
        namespace Models
        {
           [Serializable] 
           [System.Xml.Serialization.XmlInclude(typeof(Model))]
            public class Script : Model
            {      
               [Link] Plant Cotton;
               [Link] Clock Clock;

               [Description("Spacing (mm) between rows")]
               public double RowSpacing { get; set; }
               [Description("Depth (mm) Grains are planted")]
               public double SowingDepth { get; set; }
               [Description("Seeds sown (/m2)")]
               public double SowingRate { get; set; }
               [Description("Cultivar")]
               [Display(Type=DisplayType.CultivarName)]
               public string CultivarName { get; set; }
               [Description("Sowing Date")]
               public DateTime SowingDate { get; set; }

               [EventSubscribe("DoManagement")]
               private void OnDoManagement(object sender, EventArgs e)
               {
                if (Clock.Today.Date == SowingDate)
                    Cotton.Sow(population:SowingRate, cultivar:CultivarName, depth:SowingDepth, rowSpacing:RowSpacing, budNumber:1);
               }
            }
        }
```
              Manager HarvestRule
                HarvestDate = 04/04/2000 00:00:00
```csharp
using Models.Soils.Nutrients;
using System;
using Models.Core;
using System.Collections.Generic;
using System.Text;
using Models.Soils;
using Models.Soils.Nutrients;
using Models.PMF;
using Models;
using System.Xml.Serialization;
using APSIM.Shared.Utilities;

namespace Models
{
    [Serializable] 
    public class Script : Model
    {      
        [Link] Plant Cotton;          
        [Link] Clock Clock;

                    
        [Description("Harvest Date")]
        public DateTime HarvestDate { get; set; }

        [EventSubscribe("StartOfSimulation")]
        private void OnSimulationCommencing(object sender, EventArgs e)
        {
        }       
        
        [EventSubscribe("DoManagement")]
        private void OnDoManagement(object sender, EventArgs e)
        {
           if (Clock.Today.Date == HarvestDate)
           {
           Cotton.Harvest();
           Cotton.EndCrop();
           }
        }
        
        [EventSubscribe("DoManagementCalculations")]
        private void OnDoManagementCalculations(object sender, EventArgs e)
        {
            
        }
    }
}
```
              Soil: LocalName=Clarion (near Newell); NearestTown=Ames; State=Iowa; Country=US; ApsoilNumber=34; Latitude=0; Longitude=0; Comments=all data only from WSS
                DataSource=for Mahli al-Kaisi paper (Marsden Research farm), tes file , long term Cotton
                Physical
                  Thickness  BD     AirDry  LL15   DUL    SAT
                  180        1.425  0.144   0.16   0.297  0.412
                  120        1.425  0.132   0.147  0.289  0.412
                  160        1.425  0.147   0.147  0.289  0.412
                  200        1.6    0.165   0.165  0.293  0.346
                  250        1.6    0.165   0.165  0.293  0.346
                  410        1.6    0.105   0.105  0.25   0.346
                  200        1.6    0.105   0.105  0.25   0.346
                  SoilCrop CottonSoil: LL=[0.16, 0.147, 0.147, 0.165, 0.165, 0.105, 0.105]; KL=[0.08, 0.08, 0.08, 0.08, 0.08, 0.06, 0.03]; XF=[1, 1, 1, 1, 1, 0.09, 0.05]
                WaterBalance SoilWater: SummerDate=1-jun; SummerU=7.975; SummerCona=3.675; WinterDate=1-dec; WinterU=3.975; WinterCona=3.675; DiffusConst=40; DiffusSlope=16; Salb=0.13; CN2Bare=73; CNRed=20; CNCov=0.8; PSIDul=-100; Thickness=[180, 120, 160, 200, 250, 410, 200]; SWCON=[0.358, 0.375, 0.375, 0.261, 0.261, 0.369, 0.369]
                Organic: FOMCNRatio=45; CarbonUnits=Total
                  Thickness  Carbon  SoilCNRatio  FBiom  FInert  FOM
                  180        2.035   14           0.035  0.4     315.909
                  120        1.453   14           0.018  0.512   249.288
                  160        1.453   14           0.014  0.624   181.784
                  200        0.727   14           0.01   0.768   122.497
                  250        0.727   14           0.01   0.8     74.7884
                  410        0.145   14           0.01   0.8     33.2965
                  200        0.145   14           0.01   0.874   22.4371
                Chemical: Thickness=[180, 120, 160, 200, 250, 410, 200]; PH=[6.317, 6.317, 6.317, 6.582, 6.582, 7.96, 7.96]; PHUnits=Water
                Water: Thickness=[180, 120, 160, 200, 250, 410, 200]; InitialValues=[0.16, 0.147, 0.147, 0.165, 0.165, 0.105, 0.105]; RelativeTo=LL15; FilledFromTop=true
                CERESSoilTemperature Temperature
                Nutrient
                Solute NO3: Thickness=[180, 120, 160, 200, 250, 410, 200]; InitialValues=[10.5263, 5.84795, 1.31579, 0, 0, 0, 0]; InitialValuesUnits=ppm; WaterTableConcentration=0; D0=0; DepthConstant=0; MaxDepthSoluteAccessible=0; RunoffEffectivenessAtMovingSolute=0; MaxEffectiveRunoff=0
                Solute NH4: Thickness=[180, 120, 160, 200, 250, 410, 200]; InitialValues=[4.67836, 1.75439, 0.438596, 0, 0, 0, 0]; InitialValuesUnits=ppm; WaterTableConcentration=0; D0=0; DepthConstant=0; MaxDepthSoluteAccessible=0; RunoffEffectivenessAtMovingSolute=0; MaxEffectiveRunoff=0
                Solute Urea: Thickness=[180, 120, 160, 200, 250, 410, 200]; InitialValues=[0, 0, 0, 0, 0, 0, 0]; InitialValuesUnits=kg/ha; WaterTableConcentration=0; D0=0; DepthConstant=0; MaxDepthSoluteAccessible=0; RunoffEffectivenessAtMovingSolute=0; MaxEffectiveRunoff=0
              Report DailyReport: EventNames=[Clock].DoReport
                VariableNames:
                  [Clock].Today
                  [DiagnosticsVariables].Script.AccumPlantN
                  [DiagnosticsVariables].Script.AccumMineralisation
                  [DiagnosticsVariables].Script.AccumDenit
                  [DiagnosticsVariables].Script.AccumFert
                  [DiagnosticsVariables].Script.AccumLeach
                  [DiagnosticsVariables].Script.AccumDetach
                  [DiagnosticsVariables].Script.DeltaSoilOMN
                  [DiagnosticsVariables].Script.DeltaSurfaceOMN
                  [DiagnosticsVariables].Script.DeltaSoilMineralN
                  [Cotton].Root.NSupply
                  [Soil].SoilWater.Eo
                  [Soil].SoilWater.Es
                  [DiagnosticsVariables].Script.SWC
                  [DiagnosticsVariables].Script.DUL
                  [Soil].SoilWater.Drainage
                  [Soil].SoilWater.Runoff
                  [DiagnosticsVariables].Script.OutFlowLat
                  [Soil].SoilWater.pond
                  [DiagnosticsVariables].Script.AccumEO
                  [DiagnosticsVariables].Script.AccumEP
                  [DiagnosticsVariables].Script.AccumES
                  [DiagnosticsVariables].Script.AccumDrainage
                  [DiagnosticsVariables].Script.AccumRunoff
                  [DiagnosticsVariables].Script.AccumRainfall
                  [DiagnosticsVariables].Script.AccumIrrigation
                  [DiagnosticsVariables].Script.AccumOutflowLat
                  [DiagnosticsVariables].Script.SoilWaterDeficit
                  [Cotton].Grain.Live.Wt
                  [Cotton].Shell.Live.Wt
                  [Cotton].Stem.Live.Wt
                  [Cotton].Stem.Live.Wt
                  [Cotton].Grain.Live.N
                  [Cotton].Shell.Live.N
                  [Cotton].Leaf.Live.Wt
                  [Cotton].Root.Live.Wt
                  [Cotton].Leaf.Live.N
                  [Cotton].Root.Live.N
                  [Cotton].Leaf.Live.NConc
                  [Cotton].Root.Live.NConc
                  [Cotton].Root.WaterSupply
                  [Cotton].Root.WaterUptake
                  [Cotton].Leaf.Transpiration
                  [Cotton].Leaf.WaterDemand
                  [Cotton].Root.Depth
                  [Cotton].Leaf.CoverTotal
                  [Cotton].Leaf.CoverDead
                  [Cotton].Leaf.LAI
                  [Cotton].Leaf.Height
                  [Cotton].Leaf.PotentialBiomass
                  [Soil].Water.MM
                  [Soil].NO3.kgha
                  [DiagnosticsVariables].Script.SoilNitrogenContent
                  [Cotton].Arbitrator.N.TotalPlantDemand
                  [MicroClimate].net_radn
                  [MicroClimate].peta
                  [MicroClimate].petr
                  [DiagnosticsVariables].Script.FomN
                  [DiagnosticsVariables].Script.HumN
                  [DiagnosticsVariables].Script.BiomN
                  [DiagnosticsVariables].Script.DltNMinRes
                  [DiagnosticsVariables].Script.DltNMinTot
                  [Cotton].Leaf.Fw
                  [Cotton].Leaf.Fn
                  [Cotton].Phenology.CurrentPhase.Name
                  [Cotton].Phenology.Stage
                  [Cotton].Pod.Wt
                  [Cotton].Pod.N
                  [Cotton].Structure.LeafTipsAppeared
                  [Cotton].Structure.MainStemPrimordiaNo
                  [Cotton].Leaf.CohortArea[1]
                  [Cotton].Leaf.CohortArea[2]
                  [Cotton].Leaf.CohortArea[3]
                  [Cotton].Leaf.CohortArea[4]
                  [Cotton].Leaf.CohortArea[5]
                  [Cotton].Leaf.CohortArea[6]
                  [Cotton].Leaf.CohortArea[7]
                  [Cotton].Leaf.CohortArea[8]
                  [Cotton].Leaf.CohortArea[9]
                  [Cotton].Leaf.CohortArea[10]
                  [Cotton].Leaf.CohortArea[11]
                  [Cotton].Leaf.CohortArea[12]
                  [Cotton].Leaf.CohortArea[13]
                  [Cotton].Leaf.CohortArea[14]
                  [Cotton].Leaf.CohortArea[15]
                  [Cotton].Leaf.AppearedCohortNo
                  [Cotton].Leaf.DeadCohortNo
                  [Cotton].AboveGround.Wt
                  [Cotton].Phenology.Stage
                  [Cotton].Structure.MainStemPrimordiaNo
                  [Cotton].Phenology.NFF
                  [CottonHarvestRule].Script.FinalTag
                  [Cotton].Grain.NumberFunction
                  [Cotton].Shell.PodNumber
                  [Cotton].Phenology.FN
                  [Cotton].Phenology.FN.TotalNodes
                  [Cotton].Phenology.FN.VegetativeNodes
              Report HarvestReport: EventNames=[Cotton].Harvesting
                VariableNames:
                  [Clock].Today
                  [Cotton].Structure.MainStemPrimordiaNo
                  [Cotton].Phenology.NFF
                  [Cotton].Script.FinalTag
              Plant Cotton: PlantType=Cotton; IsEnding=false; DaysAfterEnding=0
      Folder MyallVale
        Experiment MyallVale2006
          Factors
            Factor Water: Specification=[IrrigationSchedule]
              Operations Wet
                1980-04-01  [Irrigation].Apply(20)
                1980-04-04  [Irrigation].Apply(20)
                1980-04-07  [Irrigation].Apply(20)
                1980-04-15  [Irrigation].Apply(50)
                1980-04-22  [Irrigation].Apply(50)
                1980-04-29  [Irrigation].Apply(50)
                1980-05-06  [Irrigation].Apply(50)
                1980-05-13  [Irrigation].Apply(50)
                1980-05-20  [Irrigation].Apply(50)
                1980-05-27  [Irrigation].Apply(50)
                1980-06-03  [Irrigation].Apply(50)
                1980-06-10  [Irrigation].Apply(50)
                1980-06-17  [Irrigation].Apply(50)
                1980-06-24  [Irrigation].Apply(50)
                1980-07-01  [Irrigation].Apply(50)
                1980-07-08  [Irrigation].Apply(50)
                1980-07-15  [Irrigation].Apply(50)
                1980-07-22  [Irrigation].Apply(50)
              Operations Dry
                1980-04-01  [Irrigation].Apply(20)
                1980-04-04  [Irrigation].Apply(20)
                1980-04-07  [Irrigation].Apply(20)
                1980-04-15  [Irrigation].Apply(50)
              Operations WetDry
                1980-04-01  [Irrigation].Apply(20)
                1980-04-04  [Irrigation].Apply(20)
                1980-04-07  [Irrigation].Apply(20)
                1980-04-15  [Irrigation].Apply(50)
                1980-04-22  [Irrigation].Apply(50)
                1980-04-29  [Irrigation].Apply(50)
                1980-05-06  [Irrigation].Apply(50)
                1980-05-13  [Irrigation].Apply(50)
          Simulation MyallVale2006Base
            Clock: Start=1980-04-01; End=1980-07-31
            Summary summaryfile
            Weather: FileName=Kununurra.met
            SoilArbitrator Soil Arbitrator
            MicroClimate: a_interception=0; b_interception=1; c_interception=0; d_interception=0; SoilHeatFluxFraction=0.4; MinimumHeightDiffForNewLayer=0; NightInterceptionFraction=0.5; ReferenceHeight=2
            Zone paddock: Area=1; Slope=0; AspectAngle=0; Altitude=50
              Irrigation
              Fertiliser
              SurfaceOrganicMatter: InitialResidueName=maize; InitialResidueType=maize; InitialResidueMass=4500; InitialStandingFraction=0; InitialCPR=0; InitialCNR=55
              Manager SowingRule
                RowSpacing = 250
                SowingDepth = 40
                SowingRate = 35
                CultivarName = Cotton_Generic
                SowingDate = 04/01/1980 00:00:00
                script: same as in Validation.Australia.Burdekin.Burdekin2008.Burdekin2008Base.paddock.SowingRule
              Operations IrrigationSchedule
              Operations Harvesting
                1980-06-22  [Cotton].Harvest();
                1980-06-22  [Cotton].EndCrop();
              Soil: Latitude=0; Longitude=0
                Physical
                  Thickness  BD    AirDry  LL15  DUL   SAT
                  150        1.56  0.05    0.19  0.3   0.31
                  150        1.52  0.08    0.21  0.31  0.33
                  150        1.46  0.21    0.21  0.31  0.34
                  150        1.46  0.22    0.22  0.32  0.34
                  150        1.42  0.22    0.22  0.33  0.34
                  150        1.42  0.22    0.22  0.33  0.34
                  300        1.46  0.22    0.22  0.32  0.34
                  SoilCrop CottonSoil: LL=[0.19, 0.21, 0.21, 0.23, 0.23, 0.24, 0.25]; KL=[0.16, 0.16, 0.12, 0.1, 0.1, 0.08, 0.06]; XF=[1, 1, 1, 1, 1, 1, 1]
                WaterBalance SoilWater: SummerDate=1-Nov; SummerU=1.5; SummerCona=6.6; WinterDate=1-Apr; WinterU=1.5; WinterCona=6.6; DiffusConst=88; DiffusSlope=35.4; Salb=0.2; CN2Bare=70; CNRed=20; CNCov=0.8; DischargeWidth=0; CatchmentArea=0; PSIDul=-100; Thickness=[150, 150, 150, 150, 150, 150, 300, 300, 300]; SWCON=[0.7, 0.7, 0.7, 0.7, 0.7, 0.7, 0.7, 0.7, 0.7]
                Organic: FOMCNRatio=36; CarbonUnits=Total
                  Thickness  Carbon  SoilCNRatio  FBiom  FInert  FOM
                  150        1.27    14.5         0.04   0.39    518.782
                  150        0.59    14.5         0.02   0.47    404.028
                  150        0.34    14.5         0.01   0.52    314.657
                  150        0.34    14.5         0.01   0.62    245.055
                  150        0.26    14.5         0.01   0.74    190.849
                  150        0.26    14.5         0.01   0.83    148.634
                  300        0.25    14.5         0.01   0.93    90.1508
                  300        0.19    14.5         0.01   0.93    54.6792
                  300        0.21    14.5         0.01   0.93    33.1646
                Chemical: Thickness=[150, 150, 150, 150, 150, 150, 300, 300, 300]; PH=[6.5, 6.2, 6.3, 6.4, 6.5, 6.6, 6.6, 6.5, 6.5]; PHUnits=Water
                CERESSoilTemperature Temperature
                Nutrient
                Water: Thickness=[150, 150, 150, 150, 150, 150, 300]; InitialValues=[0.3, 0.31, 0.31, 0.32, 0.31, 0.22, 0.22]; RelativeTo=LL15; FilledFromTop=true
                Solute NO3: Thickness=[150, 150, 150, 150, 150, 150, 300, 300, 300]; InitialValues=[2, 2, 2, 2, 2, 2, 2, 2, 2]; InitialValuesUnits=ppm; WaterTableConcentration=0; D0=0; DepthConstant=0; MaxDepthSoluteAccessible=0; RunoffEffectivenessAtMovingSolute=0; MaxEffectiveRunoff=0
                Solute NH4: Thickness=[150, 150, 150, 150, 150, 150, 300, 300, 300]; InitialValues=[1, 1, 1, 1, 1, 1, 1, 1, 1]; InitialValuesUnits=ppm; WaterTableConcentration=0; D0=0; DepthConstant=0; MaxDepthSoluteAccessible=0; RunoffEffectivenessAtMovingSolute=0; MaxEffectiveRunoff=0
                Solute Urea: Thickness=[150, 150, 150, 150, 150, 150, 300, 300, 300]; InitialValues=[0, 0, 0, 0, 0, 0, 0, 0, 0]; InitialValuesUnits=kg/ha; WaterTableConcentration=0; D0=0; DepthConstant=0; MaxDepthSoluteAccessible=0; RunoffEffectivenessAtMovingSolute=0; MaxEffectiveRunoff=0
              Report DailyReport: EventNames=[Clock].DoReport
                VariableNames:
                  [Clock].Today
                  [DiagnosticsVariables].Script.AccumPlantN
                  [DiagnosticsVariables].Script.AccumMineralisation
                  [DiagnosticsVariables].Script.AccumDenit
                  [DiagnosticsVariables].Script.AccumFert
                  [DiagnosticsVariables].Script.AccumLeach
                  [DiagnosticsVariables].Script.AccumDetach
                  [DiagnosticsVariables].Script.DeltaSoilOMN
                  [DiagnosticsVariables].Script.DeltaSurfaceOMN
                  [DiagnosticsVariables].Script.DeltaSoilMineralN
                  [Cotton].Root.NSupply
                  [Soil].SoilWater.Eo
                  [Soil].SoilWater.Es
                  [DiagnosticsVariables].Script.SWC
                  [DiagnosticsVariables].Script.DUL
                  [Soil].SoilWater.Drainage
                  [Soil].SoilWater.Runoff
                  [DiagnosticsVariables].Script.OutFlowLat
                  [Soil].SoilWater.pond
                  [DiagnosticsVariables].Script.AccumEO
                  [DiagnosticsVariables].Script.AccumEP
                  [DiagnosticsVariables].Script.AccumES
                  [DiagnosticsVariables].Script.AccumDrainage
                  [DiagnosticsVariables].Script.AccumRunoff
                  [DiagnosticsVariables].Script.AccumRainfall
                  [DiagnosticsVariables].Script.AccumIrrigation
                  [DiagnosticsVariables].Script.AccumOutflowLat
                  [DiagnosticsVariables].Script.SoilWaterDeficit
                  [Cotton].Grain.Live.Wt
                  [Cotton].Shell.Live.Wt
                  [Cotton].Stem.Live.Wt
                  [Cotton].Stem.Live.Wt
                  [Cotton].Grain.Live.N
                  [Cotton].Shell.Live.N
                  [Cotton].Leaf.Live.Wt
                  [Cotton].Root.Live.Wt
                  [Cotton].Leaf.Live.N
                  [Cotton].Root.Live.N
                  [Cotton].Leaf.Live.NConc
                  [Cotton].Root.Live.NConc
                  [Cotton].Root.WaterSupply
                  [Cotton].Root.WaterUptake
                  [Cotton].Leaf.Transpiration
                  [Cotton].Leaf.WaterDemand
                  [Cotton].Root.Depth
                  [Cotton].Leaf.CoverTotal
                  [Cotton].Leaf.CoverDead
                  [Cotton].Leaf.LAI
                  [Cotton].Leaf.Height
                  [Cotton].Leaf.PotentialBiomass
                  [Soil].Water.MM
                  [Soil].NO3.kgha
                  [DiagnosticsVariables].Script.SoilNitrogenContent
                  [Cotton].Arbitrator.N.TotalPlantDemand
                  [MicroClimate].net_radn
                  [MicroClimate].peta
                  [MicroClimate].petr
                  [DiagnosticsVariables].Script.FomN
                  [DiagnosticsVariables].Script.HumN
                  [DiagnosticsVariables].Script.BiomN
                  [DiagnosticsVariables].Script.DltNMinRes
                  [DiagnosticsVariables].Script.DltNMinTot
                  [Cotton].Leaf.Fw
                  [Cotton].Leaf.Fn
                  [Cotton].Phenology.CurrentPhase.Name
                  [Cotton].Phenology.Stage
                  [Cotton].Pod.Wt
                  [Cotton].Pod.N
                  [Cotton].Structure.LeafTipsAppeared
                  [Cotton].Structure.MainStemPrimordiaNo
                  [Cotton].Leaf.CohortArea[1]
                  [Cotton].Leaf.CohortArea[2]
                  [Cotton].Leaf.CohortArea[3]
                  [Cotton].Leaf.CohortArea[4]
                  [Cotton].Leaf.CohortArea[5]
                  [Cotton].Leaf.CohortArea[6]
                  [Cotton].Leaf.CohortArea[7]
                  [Cotton].Leaf.CohortArea[8]
                  [Cotton].Leaf.CohortArea[9]
                  [Cotton].Leaf.CohortArea[10]
                  [Cotton].Leaf.CohortArea[11]
                  [Cotton].Leaf.CohortArea[12]
                  [Cotton].Leaf.CohortArea[13]
                  [Cotton].Leaf.CohortArea[14]
                  [Cotton].Leaf.CohortArea[15]
                  [Cotton].Leaf.AppearedCohortNo
                  [Cotton].Leaf.DeadCohortNo
                  [Cotton].AboveGround.Wt
                  [Cotton].Phenology.Stage
                  [Cotton].Structure.MainStemPrimordiaNo
                  [Cotton].Phenology.NFF
                  [CottonHarvestRule].Script.FinalTag
                  [Cotton].Grain.NumberFunction
                  [Cotton].Shell.PodNumber
                  [Cotton].Phenology.FN
                  [Cotton].Phenology.FN.TotalNodes
                  [Cotton].Phenology.FN.VegetativeNodes
              Report HarvestReport: EventNames=[Cotton].Harvesting
                VariableNames:
                  [Clock].Today
                  [Cotton].Structure.MainStemPrimordiaNo
                  [Cotton].Phenology.NFF
                  [Cotton].Script.FinalTag
              Plant Cotton: PlantType=Cotton; IsEnding=false; DaysAfterEnding=0
      Folder Narrabri Deficit Experiments
        Memo Narrabri Deficit Experiments
          NEED TO CHANGE THE SOIL WATER PARAMETERS - THESE ARE NOT CORRECT - SEE EXCEL FILE

          Instead of preirrigation - start simulation on 100% initial soil water?

          Irrigation given based on a target deficit (over the whole soil profile?):

          * 35-45 mm / 80% of PAWC
          * 55-65 mm / 68% of PAWC
          * 75-85 mm / 55% of PAWC
          * 115-125 mm / 45% of PAWC

          Irrigation dates are given in excel files, but can this be simulated with a given target deficit?

          Pre-irrigation (fill up soil profile) dates:

          * 2006/07 - 28 Sep 06
          * 2007/08 - 4 Oct 07
          * 2008/09 - 2 Oct 08
        Experiment NAR0607
          Factors
            Permutation
              Factor Ir
                Specification=[AutomaticIrrigation].Script.triggerDeficit = 80, 68, 55, 45
          Simulation Narrabri deficit experiment 200607
            Clock: Start=2006-08-01; End=2007-06-30
            Summary summaryfile
            Weather: FileName=NAR0607.met
            SoilArbitrator Soil Arbitrator
            MicroClimate: a_interception=0; b_interception=1; c_interception=0; d_interception=0; SoilHeatFluxFraction=0.4; MinimumHeightDiffForNewLayer=0; NightInterceptionFraction=0.5; ReferenceHeight=2
            Zone paddock: Area=1; Slope=0; AspectAngle=0; Altitude=50
              Manager Sowing
                Crop = [Cotton]
                SowDate = 10-oct
                CultivarName = Sicot_71B
                SowingDepth = 50
                RowSpacing = 1000
                Population = 11
```csharp
using APSIM.Shared.Utilities;
using Models.Utilities;
using Models.Soils;
using Models.PMF;
using Models.Core;
using System;

namespace Models
{
    [Serializable]
    public class Script : Model
    {
        [Link] Clock Clock;
        [Link] Fertiliser Fertiliser;
        [Link] Summary Summary;
        [Link] Soil Soil;
        
        [Description("Crop")]
        public IPlant Crop { get; set; }

        [Description("Sowing date (d-mmm)")]
        public string SowDate { get; set; }

        [Display(Type = DisplayType.CultivarName)]
        [Description("Cultivar to be sown")]
        public string CultivarName { get; set; }

        [Description("Sowing depth (mm)")]
        public double SowingDepth { get; set; }

        [Description("Row spacing (mm)")]
        public double RowSpacing { get; set; }

        [Description("Plant population (/m2)")]
        public double Population { get; set; }

        [EventSubscribe("DoManagement")]
        private void OnDoManagement(object sender, EventArgs e)
        {
            if (DateUtilities.WithinDates(SowDate, Clock.Today, SowDate))
            {
                Crop.Sow(population: Population, cultivar: CultivarName, depth: SowingDepth, rowSpacing: RowSpacing);    
            }
        }
    }
}
```
              Fertiliser
              Operations FertiliserEvents
                2006-08-22  [Fertiliser].Apply(200, Fertiliser.Types.UreaN,10);
              Irrigation
              Manager PreIrrigation
                IrrigationDates = 28-sep
                FASWThreshold = 0.9
                FASWDepth = 1800
```csharp
using Models.Interfaces;
using System;
using Models.Core;
using System.Collections.Generic;
using System.Text;
using Models.Soils;
using Models.PMF;
using Models;
using System.Xml.Serialization;
using APSIM.Shared.Utilities;
using Models.Interfaces;
namespace Models
{
    [Serializable] 
    public class Script : Model
    {
        [Link] Clock clock; 
        [Link] Zone zone;
        [Link] Irrigation irrigation;
        [Link] ISoilWater waterBalance;
        [Link] IPhysical soilPhysical;
        public double FASW { get; set; }
        public double WaterDeficit  { get; set; }
    
        [Separator("A component to apply irrigation on one or more dates on every year of the simulation")]

        [Description("Enter the irrigation dates as dd-mmm with comma separation (any year information entered will be ignored)")] 
        public string[] IrrigationDates { get; set; }

        [Description("Threshold fraction available water (0-1)")]
        public double FASWThreshold { get; set; }

        [Description("Soil depth (mm) to which fraction available water is calculated")]
        public double FASWDepth { get; set; }

        [EventSubscribe("DoManagement")]
        private void OnDoManagement(object sender, EventArgs e)
        {
            foreach (string ddMMM in IrrigationDates)
            {
			    if (DateUtilities.DatesEqual(ddMMM, clock.Today))
			    {
		            CalculateFASW();                // calc FASW and WaterDeficit
		            if (FASW < FASWThreshold)
		            {
		                irrigation.Apply(WaterDeficit, depth: 0);
		            }
                }
            }            
        }

        // Calculate the fraction of the potential available sw
        // Calculate the deficit amount from DUL
        private void CalculateFASW()
        {
            double[] LL15 = MathUtilities.Multiply(soilPhysical.LL15, soilPhysical.Thickness);
            double[] DUL = MathUtilities.Multiply(soilPhysical.DUL, soilPhysical.Thickness);
        
            int nlayr = GetLayerIndex(FASWDepth);
            double cumdep = MathUtilities.Sum(soilPhysical.Thickness, 0, nlayr, 0.0);    // tricky function that sums up to before nlayr

            double part_layer = MathUtilities.Divide((FASWDepth - cumdep), soilPhysical.Thickness[nlayr], 0.0);

            // note that results may be strange if swdep < ll15
            double avail_sw = (MathUtilities.Sum(waterBalance.SWmm, 0, nlayr, 0.0) + part_layer * waterBalance.SWmm[nlayr])
                            - (MathUtilities.Sum(LL15, 0, nlayr, 0.0) + part_layer * LL15[nlayr]);

            double pot_avail_sw = (MathUtilities.Sum(DUL, 0, nlayr, 0.0) + part_layer * DUL[nlayr])
                                - (MathUtilities.Sum(LL15, 0, nlayr, 0.0) + part_layer * LL15[nlayr]);
            
            FASW = MathUtilities.Divide(avail_sw, pot_avail_sw, 0.0);
            WaterDeficit = MathUtilities.Constrain(pot_avail_sw - avail_sw, 0.0, 100000);
        }

        // Get index of the layer that has this depth in it 
        private int GetLayerIndex(double pointDepth)
        {
            double[] cumThickness = soilPhysical.ThicknessCumulative;
            int layerIdx = 0;
            while ((layerIdx < cumThickness.Length) && (pointDepth > cumThickness[layerIdx]))
            {
                layerIdx += 1;
            }

            return layerIdx;
        }
    }
}
```
              Manager AutomaticIrrigation
                triggerDeficit = 0
                allowIrrigation = True
                seasonStart = 1-dec
                seasonEnd = 14-mar
                seasonsAllocation = 10000
                targetDeficit = 95
                returndays = 7
                maximumAmount = 1000
                depthPAWC = 1800
```csharp
using Newtonsoft.Json;
using APSIM.Shared.Utilities;
using System.Xml.Serialization;
using Models.Soils;
using Models.PMF;
using Models.Core;
using System;
using Models.Interfaces;



        
namespace Models
{
    [Serializable] 
    [System.Xml.Serialization.XmlInclude(typeof(Model))]
    public class Script : Model
    {
        [Link] private ISummary summary;
        [Link] private Irrigation Irrigation;
        [Link] private Clock Clock;
        [Link] private Soil Soil;
        [Link(IsOptional = true)] private IPlant existingCrop;
        private DateTime StartDate;
        private DateTime EndDate;
        private double TopDUL;
        private double TopLL;
        private int nLayers;
        [Link]
        private IPhysical soilPhysical;
        [Link]
        private ISoilWater waterBalance;
        //Communication to other modules
       
        //User inputs from properties tab
        [Description("Turn irrigation on?")]
        public bool allowIrrigation { get; set; }
        [Description("Start of irrigation season (dd-MMM)")]
        public string seasonStart { get; set; }
        [Description("End of irrigation season (dd-MMM)")]
        public string seasonEnd { get; set; }
        [Description("Season allocation (mm)")]
        public double seasonsAllocation { get; set; }
        [Description("Deficit to trigger irrigation (% PAWC)")]
        public double triggerDeficit { get; set; }
        [Description("Deficit to stop irrigaton (% PAWC)")]
        public double targetDeficit { get; set; }
        [Description("Minimum days for irrigation to return")]
        public double returndays { get; set; }
        [Description("Maximum irrigation application (mm/day)")]
        public double maximumAmount { get; set; }
        [Description("Depth to calculate PAWC (mm)")]
        public double depthPAWC { get; set; }

        //Class members
        [JsonIgnore] public double TopSWdeficit { get; set; }
        [JsonIgnore] public double TopSWC { get; set; }
        [JsonIgnore] public double DaysSinceIrrigation { get; set; }
        [JsonIgnore] public double AmountToApply { get; set; }
        [JsonIgnore] public double SeasonAppliedAmount { get; set; }
        
        private bool IrrigationIsAllowed { get; set; }
        private bool SeasonIsOpen { get; set; }
        private bool CropIsActive { get; set; }
        private bool IrrigatorIsAvailable { get; set; }
        private bool SoilIsDry { get; set; }

    
        //Calculate static soil variables
        [EventSubscribe("StartOfSimulation")]
        private void OnStartOfSimulation(object sender, EventArgs e)
        {   
            //Set the season dates
            StartDate = DateTime.Parse(seasonStart + "-" + Clock.Today.Year.ToString());
            EndDate = DateTime.Parse(seasonEnd + "-" + Clock.Today.Year.ToString());
            
            //Can we irrigate at all?
            IrrigationIsAllowed = false; 
            if (allowIrrigation)
                IrrigationIsAllowed = true; 

            //Calculate soil water variables
            double depthFromSurface = 0.0;
            double fracLayer = 0.0;
            nLayers = soilPhysical.Thickness.Length;
            for (int layer = 0; layer < nLayers; layer++)
            {
                fracLayer = Math.Min(1.0, (depthPAWC - depthFromSurface) / soilPhysical.Thickness[layer]);
                TopLL += soilPhysical.LL15mm[layer] * fracLayer;
                TopDUL += soilPhysical.DULmm[layer] * fracLayer;
                depthFromSurface += soilPhysical.Thickness[layer];
                if (depthFromSurface >= depthPAWC)
                    layer = nLayers;
            }
        }
             
        //Determine daily requirement for irrigation
        [EventSubscribe("StartOfDay")]
        private void OnStartOfDay(object sender, EventArgs e)
        {
            //Can we irrigate today?          
            SeasonIsOpen = isBetween(Clock.Today, StartDate, EndDate);
            if (!SeasonIsOpen)
                SeasonAppliedAmount = 0;

            //Is there a crop in the ground that needs irrigation?
            CropIsActive = false;
            if ((existingCrop != null) && (existingCrop.IsAlive))
                CropIsActive = true;
            //if ((existingCrop.Phenology.Stage >= 3.0) && (existingCrop.Phenology.Stage < 6.0))
          
            //Is the irrigator available?
            IrrigatorIsAvailable = false;
            DaysSinceIrrigation += 1;
            if (DaysSinceIrrigation >= returndays)
                IrrigatorIsAvailable = true;
          
            //Is the soil dry enough to require irrigation?
            SoilIsDry = false;
            double depthFromSurface = 0.0;
            double fracLayer = 0.0;
            TopSWC = 0.0;
            for (int layer = 0; layer < nLayers; layer++)
            //for (int layer = 0; depthFromSurface < depthPAWC + soilPhysical.Thickness[layer]; layer++)
            {
                fracLayer = Math.Min(1.0, (depthPAWC - depthFromSurface) / soilPhysical.Thickness[layer]);
                TopSWC += waterBalance.SWmm[layer] * fracLayer;
                depthFromSurface += soilPhysical.Thickness[layer];
                if (depthFromSurface >= depthPAWC)
                    layer = nLayers;
            }
            
            TopSWdeficit = TopSWC - TopDUL;
            if (Math.Max(0.0, -TopSWdeficit) >= (TopDUL - TopLL) * (100 - triggerDeficit) / 100)
                SoilIsDry = true;
                
            //Are all the conditions ratifying irrigation
            if (IrrigationIsAllowed && SeasonIsOpen && CropIsActive && IrrigatorIsAvailable && SoilIsDry)
            {
                //Lets bloody well irrigate then!!!!
                AmountToApply = TopDUL * targetDeficit / 100 - TopSWC;
                AmountToApply = Math.Max(0.0, Math.Min(AmountToApply, seasonsAllocation - SeasonAppliedAmount));
                AmountToApply = Math.Min(AmountToApply,maximumAmount);
                Irrigation.Apply(AmountToApply);
                DaysSinceIrrigation = 0;
                SeasonAppliedAmount += AmountToApply;
            }
        }
        
        ///Checks whether theDate is between iniDate and endDate (non-year specific)
        private bool isBetween(DateTime theDay, DateTime iniDate, DateTime endDate)
        {
            bool result = false;
            if (iniDate.DayOfYear < endDate.DayOfYear)
            {
                // period is within one year, ex: summer in the northern hemisphere
                if ((theDay.DayOfYear >= iniDate.DayOfYear) && (theDay.DayOfYear <= endDate.DayOfYear))
                    result = true;
            }
            else
            {
                // period goes over the end of the year, ex: summer in the southern hemisphere
                if ((theDay.DayOfYear >= iniDate.DayOfYear) || (theDay.DayOfYear <= endDate.DayOfYear))
                    result = true;
            }
            
            return result;
        }
    }
}
```
              Operations IrrigationEvents (disabled)
                2006-09-28  [DeficitIrrigation].Script.FASWThreshold.Equals(0.95);
                2006-12-01  [DeficitIrrigation].Script.FASWThreshold.Equals(0.80);
                2006-12-15  [DeficitIrrigation].Script.FASWThreshold.Equals(0.80);
                2006-12-29  [DeficitIrrigation].Script.FASWThreshold.Equals(0.80);
                2007-01-08  [DeficitIrrigation].Script.FASWThreshold.Equals(0.80);
                2007-01-17  [DeficitIrrigation].Script.FASWThreshold.Equals(0.80);
                2007-01-23  [DeficitIrrigation].Script.FASWThreshold.Equals(0.80);
                2007-01-30  [DeficitIrrigation].Script.FASWThreshold.Equals(0.80);
                2007-02-05  [DeficitIrrigation].Script.FASWThreshold.Equals(0.80);
                2007-02-14  [DeficitIrrigation].Script.FASWThreshold.Equals(0.80);
                2007-02-24  [DeficitIrrigation].Script.FASWThreshold.Equals(0.80);
                2007-03-14  [DeficitIrrigation].Script.FASWThreshold.Equals(0.80);
                2006-12-01  [DeficitIrrigation].Script.FASWThreshold.Equals(0.68);
                2006-12-15  [DeficitIrrigation].Script.FASWThreshold.Equals(0.68);
                2007-01-08  [DeficitIrrigation].Script.FASWThreshold.Equals(0.68);
                2007-01-17  [DeficitIrrigation].Script.FASWThreshold.Equals(0.68);
                2007-01-29  [DeficitIrrigation].Script.FASWThreshold.Equals(0.68);
                2007-02-08  [DeficitIrrigation].Script.FASWThreshold.Equals(0.68);
                2007-02-24  [DeficitIrrigation].Script.FASWThreshold.Equals(0.68);
                2006-12-08  [DeficitIrrigation].Script.FASWThreshold.Equals(0.55);
                2006-12-29  [DeficitIrrigation].Script.FASWThreshold.Equals(0.55);
                2007-01-17  [DeficitIrrigation].Script.FASWThreshold.Equals(0.55);
                2007-01-25  [DeficitIrrigation].Script.FASWThreshold.Equals(0.55);
                2007-02-02  [DeficitIrrigation].Script.FASWThreshold.Equals(0.55);
                2007-02-14  [DeficitIrrigation].Script.FASWThreshold.Equals(0.55);
                2007-02-24  [DeficitIrrigation].Script.FASWThreshold.Equals(0.55);
                2006-12-21  [DeficitIrrigation].Script.FASWThreshold.Equals(0.45);
                2007-01-17  [DeficitIrrigation].Script.FASWThreshold.Equals(0.45);
                2007-02-05  [DeficitIrrigation].Script.FASWThreshold.Equals(0.45);
              Manager Harvesting
```csharp
using Models.PMF.Phen;
using APSIM.Shared.Utilities;
using System.Xml.Serialization;
using Models;
using Models.PMF;
using Models.Soils;
using System.Text;
using System.Collections.Generic;
using Models.Core;
using System;
using Models.Soils.Nutrients;

namespace Models
{
    [Serializable] 
    public class Script : Model
    {
        [Link] private Plant Cotton;
        [Link] private Zone zone;
        [Link(Type = LinkType.Path, Path = "[Cotton].Phenology")]
        private Phenology phenology;
                    
        
        [EventSubscribe("StartOfSimulation")]
        private void OnSimulationCommencing(object sender, EventArgs e)
        {
        }
        
        [EventSubscribe("DoManagement")]
        private void OnDoManagement(object sender, EventArgs e)
        {
            if (phenology.CurrentPhase.Name == "ReadyForHarvesting")
            {
                Cotton.Harvest();
                Cotton.EndCrop();
            }
        }
        
        [EventSubscribe("DoManagementCalculations")]
        private void OnDoManagementCalculations(object sender, EventArgs e)
        {
            
        }
    }
}
```
              Soil Grey Vertosol (Myall Vale No097): ASCOrder=Vertosol; ASCSubOrder=Grey; SoilType=Clay; Site=Myall Vale; NearestTown=Narrabri, NSW 2390; Region=North West Slopes and Plains; State=New South Wales; Country=Australia; NaturalVegetation=Grasslands; ApsoilNumber=97; Latitude=-30.2056; Longitude=149.593; LocationAccuracy=+/- 20m; YearOfSampling=0; DataSource=CSIRO Plant Industry, Myall Vale (D Richards); Comments=Clay -
                Physical
                  Thickness  BD    AirDry  LL15  DUL   SAT
                  150        1.31  0.11    0.22  0.43  0.48
                  150        1.26  0.176   0.22  0.44  0.49
                  300        1.36  0.22    0.22  0.41  0.46
                  300        1.39  0.22    0.22  0.4   0.45
                  300        1.44  0.22    0.22  0.38  0.43
                  300        1.45  0.22    0.22  0.37  0.42
                  300        1.46  0.22    0.22  0.37  0.42
                  BD, DUL source: Field measured and checked for sensibility
                  AirDry, LL15 source: Estimated based on local knowledge
                  SAT source: Calculated from measured, estimated or calculated BD
                  SoilCrop CottonSoil: LL=[0.22, 0.22, 0.22, 0.25, 0.27, 0.3, 0.33]; KL=[0.1, 0.1, 0.1, 0.1, 0.09, 0.07, 0.05]; XF=[1, 1, 1, 1, 1, 1, 1]
                    LL source: Field measured and checked for sensibility
                WaterBalance SoilWater: SummerDate=1-Nov; SummerU=6; SummerCona=3.5; WinterDate=1-Apr; WinterU=4; WinterCona=2.5; DiffusConst=40; DiffusSlope=16; Salb=0.12; CN2Bare=73; CNRed=20; CNCov=0.8; PSIDul=-100; Thickness=[150, 150, 300, 300, 300, 300, 300]; SWCON=[0.3, 0.3, 0.3, 0.3, 0.3, 0.3, 0.3]
                Organic: FOMCNRatio=40; CarbonUnits=Total
                  Thickness  Carbon  SoilCNRatio  FBiom  FInert  FOM
                  150        0.88    12           0.04   0.4     347.129
                  150        0.76    12           0.02   0.6     270.344
                  300        0.62    12           0.02   0.8     163.972
                  300        0.32    12           0.02   1       99.454
                  300        0.12    12           0.01   1       60.322
                  300        0.1     12           0.01   1       36.587
                  300        0.05    12           0.01   1       22.191
                Chemical: Thickness=[150, 150, 300, 300, 300, 300, 300]; PH=[8.9, 9.2, 9.3, 9, 8.8, 7.5, 8.4]; PHUnits=Water
                  PH source: Estimated based on local knowledge
                Nutrient
                Water: Thickness=[150, 150, 300, 300, 300, 300, 300]; InitialValues=[0.22, 0.22, 0.22, 0.22, 0.22, 0.22, 0.22]; RelativeTo=LL15; FilledFromTop=true
                CERESSoilTemperature
                Solute NO3: Thickness=[150, 150, 300, 300, 300, 300, 300]; InitialValues=[29.7, 18.3, 6.4, 4, 3, 2.8, 0]; InitialValuesUnits=ppm; WaterTableConcentration=0; D0=0; DepthConstant=0; MaxDepthSoluteAccessible=0; RunoffEffectivenessAtMovingSolute=0; MaxEffectiveRunoff=0
                Solute NH4: Thickness=[150, 150, 300, 300, 300, 300, 300]; InitialValues=[0, 0, 0, 0, 0, 0, 0]; InitialValuesUnits=ppm; WaterTableConcentration=0; D0=0; DepthConstant=0; MaxDepthSoluteAccessible=0; RunoffEffectivenessAtMovingSolute=0; MaxEffectiveRunoff=0
                Solute Urea: same as Validation.Australia.Narrabri Deficit Experiments.NAR0607.Narrabri deficit experiment 200607.paddock.Grey Vertosol (Myall Vale No097).NH4
              SurfaceOrganicMatter: InitialResidueName=nativepasture; InitialResidueType=nativepasture; InitialResidueMass=0; InitialStandingFraction=0; InitialCPR=0; InitialCNR=0
              Plant Cotton: PlantType=Cotton; IsEnding=false; DaysAfterEnding=0
              Report DailyReport: same as Validation.Australia.MyallVale.MyallVale2006.MyallVale2006Base.paddock.DailyReport
              Report HarvestReport: EventNames=[Cotton].Harvesting
                VariableNames:
                  [Clock].Today
                  [Cotton].Structure.MainStemPrimordiaNo
                  [Cotton].Phenology.NFF
                  [Cotton].Script.FinalTag
        Experiment NAR0708
          Factors
            Permutation
              Factor Ir
                Specification=[AutomaticIrrigation].Script.triggerDeficit = 80, 68, 55, 45
          Simulation Narrabri deficit experiment 200708
            Clock: Start=2007-08-01; End=2008-06-30
            Summary summaryfile
            Weather: FileName=NAR0708.met
            SoilArbitrator Soil Arbitrator
            MicroClimate: a_interception=0; b_interception=1; c_interception=0; d_interception=0; SoilHeatFluxFraction=0.4; MinimumHeightDiffForNewLayer=0; NightInterceptionFraction=0.5; ReferenceHeight=2
            Zone paddock: Area=1; Slope=0; AspectAngle=0; Altitude=50
              Manager Sowing
                Crop = [Cotton]
                SowDate = 15-oct
                CultivarName = Sicot_71B
                SowingDepth = 50
                RowSpacing = 1000
                Population = 10
                script: same as in Validation.Australia.Narrabri Deficit Experiments.NAR0607.Narrabri deficit experiment 200607.paddock.Sowing
              Fertiliser
              Operations FertiliserEvents
                2007-09-28  [Fertiliser].Apply(200, Fertiliser.Types.UreaN,10);
              Irrigation
              Manager PreIrrigation
                IrrigationDates = 4-oct
                FASWThreshold = 0.9
                FASWDepth = 1800
                script: same as in Validation.Australia.Narrabri Deficit Experiments.NAR0607.Narrabri deficit experiment 200607.paddock.PreIrrigation
              Manager AutomaticIrrigation
                triggerDeficit = 0
                allowIrrigation = True
                seasonStart = 6-dec
                seasonEnd = 10-mar
                seasonsAllocation = 10000
                targetDeficit = 95
                returndays = 7
                maximumAmount = 1000
                depthPAWC = 1800
                script: same as in Validation.Australia.Narrabri Deficit Experiments.NAR0607.Narrabri deficit experiment 200607.paddock.AutomaticIrrigation
              Operations IrrigationEvents (disabled)
                2007-10-04  [AutomaticIrrigation].Script.triggerDeficit.Equals(100);
                2007-12-06  [AutomaticIrrigation].Script.triggerDeficit.Equals(80);
                2007-12-14  ;
                2007-12-31  ;
                2008-01-05  ;
                2008-01-15  ;
                2008-01-29  ;
                2008-02-11  ;
                2008-02-18  ;
                2008-02-25  ;
                2008-03-10  ;
                2007-12-12  [AutomaticIrrigation].Script.triggerDeficit.Equals(68);
                2008-01-03  ;
                2008-01-17  ;
                2008-02-01  ;
                2008-02-21  ;
                2008-03-10  ;
                2007-12-14  [AutomaticIrrigation].Script.triggerDeficit.Equals(55);
                2008-01-11  ;
                2008-02-11  ;
                2008-02-25  ;
                2008-01-05  [AutomaticIrrigation].Script.triggerDeficit.Equals(45);
                2008-02-18  ;
              Manager Harvesting: same as Validation.Australia.Narrabri Deficit Experiments.NAR0607.Narrabri deficit experiment 200607.paddock.Harvesting
              Soil Grey Vertosol (Myall Vale No097): same as Validation.Australia.Narrabri Deficit Experiments.NAR0607.Narrabri deficit experiment 200607.paddock.Grey Vertosol (Myall Vale No097)
              SurfaceOrganicMatter: InitialResidueName=nativepasture; InitialResidueType=nativepasture; InitialResidueMass=0; InitialStandingFraction=0; InitialCPR=0; InitialCNR=0
              Plant Cotton: PlantType=Cotton; IsEnding=false; DaysAfterEnding=0
              Report DailyReport: same as Validation.Australia.MyallVale.MyallVale2006.MyallVale2006Base.paddock.DailyReport
              Report HarvestReport: EventNames=[Cotton].Harvesting
                VariableNames:
                  [Clock].Today
                  [Cotton].Structure.MainStemPrimordiaNo
                  [Cotton].Phenology.NFF
                  [Cotton].Script.FinalTag
        Experiment NAR0809
          Factors
            Permutation
              Factor Ir
                Specification=[AutomaticIrrigation].Script.triggerDeficit = 80, 68, 55, 45
          Simulation Narrabri deficit experiment 200809
            Clock: Start=2008-08-01; End=2009-06-30
            Summary summaryfile
            Weather: FileName=NAR0809.met
            SoilArbitrator Soil Arbitrator
            MicroClimate: a_interception=0; b_interception=1; c_interception=0; d_interception=0; SoilHeatFluxFraction=0.4; MinimumHeightDiffForNewLayer=0; NightInterceptionFraction=0.5; ReferenceHeight=2
            Zone paddock: Area=1; Slope=0; AspectAngle=0; Altitude=50
              Manager Sowing
                Crop = [Cotton]
                SowDate = 15-oct
                CultivarName = Sicot_71B
                SowingDepth = 50
                RowSpacing = 1000
                Population = 9
                script: same as in Validation.Australia.Narrabri Deficit Experiments.NAR0607.Narrabri deficit experiment 200607.paddock.Sowing
              Fertiliser
              Operations FertiliserEvents
                2008-09-12  [Fertiliser].Apply(200, Fertiliser.Types.UreaN,10);
              Irrigation
              Manager PreIrrigation
                IrrigationDates = 2-oct
                FASWThreshold = 0.9
                FASWDepth = 1800
                script: same as in Validation.Australia.Narrabri Deficit Experiments.NAR0607.Narrabri deficit experiment 200607.paddock.PreIrrigation
              Manager AutomaticIrrigation
                triggerDeficit = 0
                allowIrrigation = True
                seasonStart = 9-dec
                seasonEnd = 16-mar
                seasonsAllocation = 10000
                targetDeficit = 95
                returndays = 7
                maximumAmount = 1000
                depthPAWC = 1800
                script: same as in Validation.Australia.Narrabri Deficit Experiments.NAR0607.Narrabri deficit experiment 200607.paddock.AutomaticIrrigation
              Operations IrrigationEvents (disabled)
                2008-10-02  [AutomaticIrrigation].Script.triggerDeficit.Equals(100);
                2008-12-09  [AutomaticIrrigation].Script.triggerDeficit.Equals(80);
                2008-12-22  ;
                2009-01-02  ;
                2009-01-09  ;
                2009-01-15  ;
                2009-01-23  ;
                2009-01-30  ;
                2009-02-05  ;
                2009-02-11  ;
                2009-02-27  ;
                2009-03-12  ;
                2008-12-12  [AutomaticIrrigation].Script.triggerDeficit.Equals(68);
                2008-12-24  ;
                2009-01-07  ;
                2009-01-15  ;
                2009-01-25  ;
                2009-02-02  ;
                2009-02-10  ;
                2009-03-03  ;
                2009-03-16  ;
                2009-01-11  [AutomaticIrrigation].Script.triggerDeficit.Equals(55);
                2009-01-28  ;
                2009-02-08  ;
                2009-03-06  ;
                2009-01-16  [AutomaticIrrigation].Script.triggerDeficit.Equals(45);
                2009-02-06  ;
              Manager Harvesting: same as Validation.Australia.Narrabri Deficit Experiments.NAR0607.Narrabri deficit experiment 200607.paddock.Harvesting
              Soil Grey Vertosol (Myall Vale No097): ASCOrder=Vertosol; ASCSubOrder=Grey; SoilType=Clay; Site=Myall Vale; NearestTown=Narrabri, NSW 2390; Region=North West Slopes and Plains; State=New South Wales; Country=Australia; NaturalVegetation=Grasslands; ApsoilNumber=97; Latitude=-30.2056; Longitude=149.593; LocationAccuracy=+/- 20m; YearOfSampling=0; DataSource=CSIRO Plant Industry, Myall Vale (D Richards); Comments=Clay -
                Physical: same as Validation.Australia.Narrabri Deficit Experiments.NAR0607.Narrabri deficit experiment 200607.paddock.Grey Vertosol (Myall Vale No097).Physical
                WaterBalance SoilWater: same as Validation.Australia.Narrabri Deficit Experiments.NAR0607.Narrabri deficit experiment 200607.paddock.Grey Vertosol (Myall Vale No097).SoilWater
                Organic: same as Validation.Australia.Narrabri Deficit Experiments.NAR0607.Narrabri deficit experiment 200607.paddock.Grey Vertosol (Myall Vale No097).Organic
                Chemical: same as Validation.Australia.Narrabri Deficit Experiments.NAR0607.Narrabri deficit experiment 200607.paddock.Grey Vertosol (Myall Vale No097).Chemical
                Nutrient
                Water: Thickness=[150, 150, 300, 300, 300, 300, 300]; InitialValues=[0.22, 0.22, 0.22, 0.22, 0.22, 0.22, 0.22]; RelativeTo=LL15; FilledFromTop=true
                CERESSoilTemperature
                Solute NO3: Thickness=[150, 150, 300, 300, 300, 300, 300]; InitialValues=[2.6, 19.2, 0, 0, 0, 0, 0]; InitialValuesUnits=ppm; WaterTableConcentration=0; D0=0; DepthConstant=0; MaxDepthSoluteAccessible=0; RunoffEffectivenessAtMovingSolute=0; MaxEffectiveRunoff=0
                Solute NH4: same as Validation.Australia.Narrabri Deficit Experiments.NAR0607.Narrabri deficit experiment 200607.paddock.Grey Vertosol (Myall Vale No097).NH4
                Solute Urea: same as Validation.Australia.Narrabri Deficit Experiments.NAR0607.Narrabri deficit experiment 200607.paddock.Grey Vertosol (Myall Vale No097).NH4
              SurfaceOrganicMatter: InitialResidueName=nativepasture; InitialResidueType=nativepasture; InitialResidueMass=0; InitialStandingFraction=0; InitialCPR=0; InitialCNR=0
              Plant Cotton: PlantType=Cotton; IsEnding=false; DaysAfterEnding=0
              Report DailyReport: same as Validation.Australia.MyallVale.MyallVale2006.MyallVale2006Base.paddock.DailyReport
              Report HarvestReport: EventNames=[Cotton].Harvesting
                VariableNames:
                  [Clock].Today
                  [Cotton].Structure.MainStemPrimordiaNo
                  [Cotton].Phenology.NFF
                  [Cotton].Script.FinalTag
      Folder Burdekin Planting Date Experiments
        Memo Burdekin Planting Date Experiments
          * Irrigation was scheduled using electronic capacitance probes(Envirotech, EP100EL-12) that were installed to a depth of 120 cm with dielectric sensors located at 10 cm intervals.

          * Two probes were installed in different replicates for each sowing time, enabling real time monitoring of soil moisture via an integrated radio frequency linked telemetry-based software system.

          * Irrigation was applied using ground water, scheduled at a 35–45 mm water deficit in the top 50 cm of the soil profile and refilled to the drained upper limit during each irrigation.

          ====================================================================================

          See papers:

          Cotton production during the tropical monsoon season. I – The influence of variable radiation on boll loss, compensation and yield

          P. R. Grundy, S. J. Yeates and K. L. Bell

          Field Crops Research 2020 Vol. 254 Pages 107790

          DOI: 10.1016/j.fcr.2020.107790

          Cotton production during the tropical monsoon season. II – Biomass accumulation, partitioning and RUE in response to boll loss and compensation

          P. R. Grundy, S. J. Yeates and K. L. Bell

          Field Crops Research 2020 Vol. 255 Pages 107868

          DOI: 10.1016/j.fcr.2020.107868
        Experiment BDK08P1 (disabled)
          Memo
            Cultivars:

            S24 = Manark

            S60 = Warrigal

            S70 = Leichhardt

            S80 = Djakal1

            =================

            Plant density:

            S24 = 6.45

            S60 = 6.35

            S70 = 6.9

            S80 = 7.0

            Average = 6.7
          Factors
            Permutation
              Factor Cv
                Specification=[Sowing].Script.CultivarName = Siokra_24BRF, Sicala_60BRF, Sicot_70BRF, Sicot_80
          Simulation BDK08P1
            Clock: Start=2007-11-01; End=2008-08-31
            Summary summaryfile
            Weather: FileName=QLD_BDK2008-12.met
            SoilArbitrator Soil Arbitrator
            MicroClimate: a_interception=0; b_interception=1; c_interception=0; d_interception=0; SoilHeatFluxFraction=0.4; MinimumHeightDiffForNewLayer=0; NightInterceptionFraction=0.5; ReferenceHeight=2
            Zone paddock: Area=1; Slope=0; AspectAngle=0; Altitude=50
              Manager Sowing
                Crop = [Cotton]
                SowDate = 3-dec
                CultivarName = Cotton_Generic
                SowingDepth = 50
                RowSpacing = 750
                Population = 6.7
                script: same as in Validation.Australia.Narrabri Deficit Experiments.NAR0607.Narrabri deficit experiment 200607.paddock.Sowing
              Fertiliser
              Operations FertiliserEvents
                2007-12-03  [Fertiliser].Apply(90, Fertiliser.Types.UreaN,10);
                2007-12-19  [Fertiliser].Apply(90, Fertiliser.Types.NH4N,10);
              Irrigation
              Manager AutomaticIrrigation
                triggerDeficit = 80
                allowIrrigation = True
                seasonStart = 3-dec
                seasonEnd = 16-apr
                seasonsAllocation = 10000
                targetDeficit = 100
                returndays = 0
                maximumAmount = 1000
                depthPAWC = 500
                script: same as in Validation.Australia.Narrabri Deficit Experiments.NAR0607.Narrabri deficit experiment 200607.paddock.AutomaticIrrigation
              Operations IrrigationEvents
                2007-12-03  ;
                2008-03-11  ;
                2008-03-19  ;
                2008-03-25  ;
                2008-04-01  ;
                2008-04-09  ;
                2008-04-16  ;
              Manager Harvesting
                script: same as in Validation.Australia.Narrabri Deficit Experiments.NAR0607.Narrabri deficit experiment 200607.paddock.Harvesting
              Soil Ayr Loam (Estimated): SoilType=Grey Vertosol; Site=Ayr Queensland; NearestTown=Ayr, QLD  4807; Region=Burdekin; State=Queensland; Country=Australia; NaturalVegetation=Flood Plain; Latitude=-19.576; Longitude=147.405; LocationAccuracy=+/- 20m; DataSource=CSIRO Plant Industry, Approximation Only
                Comments=Based on Myall Vale heavy clay.  Adjusted based on observations by Dr Stephen Yeates (CSIRO Plant Industry)
                Physical
                  Thickness  BD     AirDry  LL15   DUL    SAT
                  150        1.527  0.08    0.186  0.279  0.38
                  100        1.393  0.099   0.196  0.289  0.38
                  100        1.393  0.12    0.215  0.289  0.371
                  250        1.437  0.14    0.215  0.297  0.381
                  200        1.483  0.15    0.231  0.306  0.392
                  200        1.453  0.15    0.231  0.316  0.388
                  300        1.506  0.15    0.282  0.306  0.377
                  200        1.49   0.15    0.301  0.313  0.377
                  200        1.537  0.15    0.306  0.322  0.377
                  SoilCrop CottonSoil: LL=[0.19, 0.205, 0.223, 0.223, 0.238, 0.24, 0.29, 0.305, 0.31]; KL=[0.1, 0.1, 0.1, 0.1, 0.09, 0.07, 0.05, 0.05, 0.05]; XF=[1, 1, 1, 1, 1, 1, 1, 1, 1]
                WaterBalance SoilWater: SummerDate=1-Nov; SummerU=6; SummerCona=3.5; WinterDate=1-Apr; WinterU=4; WinterCona=2.5; DiffusConst=40; DiffusSlope=16; Salb=0.12; CN2Bare=73; CNRed=20; CNCov=0.8; PSIDul=-100; Thickness=[150, 100, 100, 250, 200, 200, 300, 200, 200]; SWCON=[0.3, 0.3, 0.3, 0.3, 0.3, 0.3, 0.3, 0.3, 0.3]
                Organic: FOMCNRatio=40; CarbonUnits=Total
                  Thickness  Carbon  SoilCNRatio  FBiom  FInert  FOM
                  150        0.88    12           0.04   0.4     261.633
                  100        0.76    12           0.02   0.6     219.307
                  100        0.62    12           0.02   0.8     183.828
                  250        0.32    12           0.02   1       118.253
                  200        0.12    12           0.01   1       83.087
                  200        0.1     12           0.01   1       58.378
                  300        0.05    12           0.01   1       34.382
                  200        0.039   12           0.01   1       24.157
                  200        0.036   12           0.01   1       16.973
                Chemical: Thickness=[150, 100, 100, 250, 200, 200, 300, 200, 200]; PH=[8.9, 9.2, 9.3, 9, 8.8, 7.5, 8.4, 8.4, 8.4]; PHUnits=Water
                  PH source: Estimated based on local knowledge (layer 1, 2, 3, 4, 5, 6, 7)
                Nutrient
                Water: Thickness=[150, 100, 100, 250, 200, 200, 300, 200, 200]; RelativeTo=Soybean; FilledFromTop=true
                  InitialValues=[0.279, 0.289, 0.289, 0.251, 0.238, 0.24, 0.29, 0.305, 0.31]
                CERESSoilTemperature Temperature
                Solute NO3: Thickness=[1700]; InitialValues=[90]; InitialValuesUnits=kg/ha; WaterTableConcentration=0; D0=0; DepthConstant=0; MaxDepthSoluteAccessible=0; RunoffEffectivenessAtMovingSolute=0; MaxEffectiveRunoff=0
                Solute NH4: Thickness=[1700]; InitialValues=[0]; InitialValuesUnits=ppm; WaterTableConcentration=0; D0=0; DepthConstant=0; MaxDepthSoluteAccessible=0; RunoffEffectivenessAtMovingSolute=0; MaxEffectiveRunoff=0
                Solute Urea: Thickness=[100]; InitialValues=[0]; InitialValuesUnits=kg/ha; WaterTableConcentration=0; D0=0; DepthConstant=0; MaxDepthSoluteAccessible=0; RunoffEffectivenessAtMovingSolute=0; MaxEffectiveRunoff=0
              SurfaceOrganicMatter: InitialResidueName=maize; InitialResidueType=maize; InitialResidueMass=2000; InitialStandingFraction=0; InitialCPR=0; InitialCNR=33
              Plant Cotton: PlantType=Cotton; IsEnding=false; DaysAfterEnding=0
                OrganArbitrator Arbitrator
                  BiomassTypeArbitrator DMArbitration
                    Folder PotentialPartitioningMethods
                      ReallocationMethod
                      AllocateFixationMethod
                      RetranslocationMethod
                      SendPotentialDMAllocationsMethod
                    Folder AllocationMethods
                      NutrientConstrainedAllocationMethod
                      DryMatterAllocationsMethod
                    RelativeAllocation ArbitrationMethod
                  BiomassTypeArbitrator NArbitration
                    Folder PotentialPartitioningMethods
                      ReallocationMethod
                    Folder ActualPartitioningMethods
                      AllocateFixationMethod
                      RetranslocationMethod
                    Folder AllocationMethods
                      NitrogenAllocationsMethod
                    RelativeAllocation ArbitrationMethod
                    AllocateUptakesMethod
                  WaterUptakeMethod
                  NitrogenUptakeMethod
                Phenology
                  Memo Introduction
                    In the new model we simplified phenology by taking out stages that are not measurable (e.g. end of juvenile stage) and by adding new stages that are measurable (e.g. start pod).
                    The new phenology follows the V/R staging system.

                    ![Alt Text](Diagrams_soy_phenology_comparison.png)

                    **Figure [FigureNumber]:** Comparison of Cotton phenological stages for APSIM Classic and APSIM Next Generation.
                  Memo
                    The key differences for cultivars are mostly phenological parameters (e.g., Vegetative.Target, ReproductivePhotoperiodModifier). In some cases, some additional parameters have been changed, see parameter values in the cultivar section.
                  HourlyInterpolation VegetativeThermalTime: agregationMethod=0
                    XYPairs Response: X=[10, 20, 30, 40]; Y=[0, 10, 20, 0]
                    ThreeHourSin InterpolationMethod
                  LinearInterpolationFunction VegetativePhotoperiodModifier
                    XYPairs: X=[14.43, 21.19]; Y=[1, 0]
                    Memo
                      These parameters are overridden by cultivar parameter descriptions to capture the difference between individual cultivars in terms of their phenological development.  Responses shown here are only indicative.  See cultivar descriptions for more information.
                    VariableReference XValue: VariableName=[Phenology].Photoperiod
                  HourlyInterpolation ReproductiveThermalTime: agregationMethod=0
                    XYPairs Response: X=[10, 15, 30, 40]; Y=[5, 5, 20, 0]
                    ThreeHourSin InterpolationMethod
                    Memo
                      Cardinal temperatures for vegetative and reproductive thermal time are the same except the range of 0-15° C. A base temperature of 10° C is used for vegetative phase, which temperature has been used to calibrate 56 Cotton cultivars in the USA ([ARCHONTOULIS2014465]) and 72 Cotton cultivars in China ([WU2019125940]). The small changes in cardinal temperatures for reproductive thermal time was important for solving issues related to photoperiod response for some Australian cultivars. Such a differentiation in base temperature between V and R stages is supported by [BootChapter1998], DSSAT-CROPGRO Cotton model, who showed that cardinal temperatures may differ for vegetative and reproductive development for Cotton. This is something to further explore as new data from other environments are added to the APSIM NG database.
                  LinearInterpolationFunction ReproductivePhotoperiodModifier: same as Validation.Australia.Burdekin Planting Date Experiments.BDK08P1.BDK08P1.paddock.Cotton.Phenology.VegetativePhotoperiodModifier
                  PhaseLookup ThermalTime
                    PhaseLookupValue PreEmergence: Start=Sowing; End=Emergence
                      VariableReference Base: VariableName=[Phenology].VegetativeThermalTime
                    PhaseLookupValue VegetativeGrowth: Start=Emergence; End=EndCanopyDevelopment
                      MultiplyFunction TT
                        VariableReference Base: VariableName=[Phenology].VegetativeThermalTime
                        VariableReference PPModifier: VariableName=[Phenology].VegetativePhotoperiodModifier
                    PhaseLookupValue ReproductiveGrowth: Start=EndCanopyDevelopment; End=HarvestRipe
                      MultiplyFunction TT
                        VariableReference Base: VariableName=[Phenology].ReproductiveThermalTime
                        VariableReference PPModifier: VariableName=[Phenology].ReproductivePhotoperiodModifier
                  PhotoperiodFunction Photoperiod: Twilight=0; DayLength=0
                  GerminatingPhase Germinating: Start=Sowing; End=Germination
                  EmergingPhase Emerging: Start=Germination; End=Emergence; TTForTimeStep=0
                    VariableReference ThermalTime: VariableName=[Phenology].VegetativeThermalTime
                    AddFunction Target
                      Constant ShootLag: FixedValue=10
                      MultiplyFunction DepthxRate
                        VariableReference SowingDepth: VariableName=[Plant].SowingData.Depth
                        Constant ShootRate: FixedValue=1
                  GenericPhase Vegetative: Start=Emergence; End=StartFlowering
                    Constant Target: FixedValue=200
                    VariableReference Progression: VariableName=[Phenology].ThermalTime
                  GenericPhase EarlyFlowering: Start=StartFlowering; End=StartPodDevelopment
                    Memo
                      The duration of the grain filling phase has been taken from the model of Robertson et al (2002).
                    Constant Target: FixedValue=200
                    VariableReference Progression: VariableName=[Phenology].ThermalTime
                  GenericPhase EarlyPodDevelopment: Start=StartPodDevelopment; End=StartGrainFilling
                    Memo
                      The duration of the grain filling phase has been taken from the model of Robertson et al (2002).
                    Constant Target: FixedValue=140
                    VariableReference Progression: VariableName=[Phenology].ThermalTime
                  GenericPhase EarlyGrainFilling: Start=StartGrainFilling; End=EndCanopyDevelopment
                    MultiplyFunction Target
                      Constant FractionofGrainfilling: FixedValue=0.05
                      VariableReference EntireGrainfilling
                        VariableName=[Phenology].LateGrainFilling.Target.EntireGrainfillPeriod.FixedValue
                    VariableReference Progression: VariableName=[Phenology].ThermalTime
                  GenericPhase MidGrainFilling: Start=EndCanopyDevelopment; End=EndPodDevelopment
                    MultiplyFunction Target
                      Constant FractionofMidToLateGrainfilling: FixedValue=0.5
                      SubtractFunction MidToLateGrainfilling
                        VariableReference EntireGrainfilling
                          VariableName=[Phenology].LateGrainFilling.Target.EntireGrainfillPeriod.FixedValue
                        VariableReference EarlyGrainfilling: VariableName=[Phenology].EarlyGrainFilling.Target
                    VariableReference Progression: VariableName=[Phenology].ThermalTime
                  GenericPhase LateGrainFilling: Start=EndPodDevelopment; End=EndGrainFill
                    SubtractFunction Target
                      Constant EntireGrainfillPeriod: FixedValue=500
                      VariableReference EarlyGrainFillingTarget: VariableName=[Phenology].EarlyGrainFilling.Target
                      VariableReference MidGrainFillingTarget: VariableName=[Phenology].MidGrainFilling.Target
                    VariableReference Progression: VariableName=[Phenology].ThermalTime
                  GenericPhase Maturing: Start=EndGrainFill; End=Maturity
                    Constant Target: FixedValue=45
                    VariableReference Progression: VariableName=[Phenology].ThermalTime
                  GenericPhase Ripening: Start=Maturity; End=HarvestRipe
                    Constant Target: FixedValue=45
                    VariableReference Progression: VariableName=[Phenology].ThermalTime
                  EndPhase ReadyForHarvesting: Start=HarvestRipe; End=Unused
                    VariableReference ThermalTime: VariableName=[Phenology].ThermalTime
                  OnEventFunction EmergenceDAS: SetEvent=Emergence; ReSetEvent=never
                    Memo
                      A function is used to provide emergence date as days after sowing(DAS).
                    Constant PreEventValue: FixedValue=0
                    VariableReference PostEventValue: VariableName=[Plant].DaysAfterSowing
                  OnEventFunction FloweringDAS: SetEvent=StartFlowering; ReSetEvent=never
                    Memo
                      A function is used to provide flowering date as days after sowing(DAS).
                    Constant PreEventValue: FixedValue=0
                    VariableReference PostEventValue: VariableName=[Plant].DaysAfterSowing
                  OnEventFunction MaturityDAS: SetEvent=Maturity; ReSetEvent=never
                    Memo
                      A function is used to provide maturity date as days after sowing(DAS).
                    Constant PreEventValue: FixedValue=0
                    VariableReference PostEventValue: VariableName=[Plant].DaysAfterSowing
                SimpleLeaf Leaf: Albedo=0.25; Gsmax350=0.015; R50=150; LeafInitialisationStage=Emergence; Height=0; BaseHeight=0; Width=0; FRGR=0; PotentialEP=0; WaterDemand=0; KDead=0.2; LAIDead=0
                  RUEModel Photosynthesis
                    Constant RUE: FixedValue=1.2
                      Memo
                        This value has been fitted to available data. In contrast to Classic, the RUE value in NG refers to the whole plant (above and below ground) and the calibrated value is 1.2 g/MJ. There are no literature references for whole plant RUE in Cotton. To come up with this value we considered: RUE for above ground biomass ([SINCLAIR198929]; [VANROEKEL20141189]), biomass and root data from Iowa FACTS experiments and model fitting to available data.
                    WeightedTemperatureFunction FT: MaximumTemperatureWeighting=0.5
                      XYPairs: X=[10, 20, 30, 40]; Y=[0, 1, 1, 0]
                      Memo
                        The function for temperature effect on RUE comes from APSIM classic, which seems to work well across diverse environments. We did not find any comments/suggestions in the published papers suggesting alternative ones, so for now we used the same function. As more data from different environments are added to APSIM database, it will be possible to further test the photosynthetic temperature response in the future.
                    LinearInterpolationFunction FVPD
                      XYPairs: X=[0, 10, 50]; Y=[1, 1, 1]
                      VariableReference XValue: VariableName=[Leaf].Photosynthesis.VPD
                    LinearInterpolationFunction FN
                      XYPairs: X=[0, 1, 1.5]; Y=[0, 1, 1]
                      VariableReference XValue: VariableName=[Leaf].Fn
                    LinearInterpolationFunction FW
                      XYPairs: X=[0, 1]; Y=[0, 1]
                      VariableReference XValue: VariableName=[Leaf].Fw
                    RUECO2Function FCO2: PhotosyntheticPathway=C3
                    VariableReference RadnInt: VariableName=[Leaf].RadiationIntercepted
                  StomatalConductanceCO2Modifier
                    VariableReference PhotosynthesisCO2Modifier: VariableName=[Leaf].Photosynthesis.FCO2
                  MultiplyFunction Area
                    VariableReference SLA: VariableName=[Leaf].SpecificArea
                    VariableReference LeafLiveWt: VariableName=[Leaf].Live.Wt
                  MinimumFunction FRGR
                    VariableReference RUE_FT: VariableName=[Leaf].Photosynthesis.FT
                    MinimumFunction Others
                      VariableReference RUE_FN: VariableName=[Leaf].Photosynthesis.FN
                      VariableReference RUE_FVPD: VariableName=[Leaf].Photosynthesis.FVPD
                  LinearInterpolationFunction ExtinctionCoefficient
                    XYPairs: X=[200, 1000]; Y=[0.6, 0.4]
                    VariableReference XValue: VariableName=[Cotton].SowingData.RowSpacing
                  LinearInterpolationFunction Tallness
                    XYPairs: X=[1, 2, 3, 4, 5, 6, 9]; Y=[0, 0, 50, 400, 700, 900, 1000]
                    VariableReference XValue: VariableName=[Phenology].Stage
                  AccumulateFunction NodeNumber: StartStageName=Emergence; EndStageName=EndCanopyDevelopment; FractionRemovedOnCut=1; FractionRemovedOnHarvest=1; FractionRemovedOnGraze=1; FractionRemovedOnPrune=0
                    DivideFunction DeltaNode
                      VariableReference ThermalTime: VariableName=[Phenology].VegetativeThermalTime
                      VariableReference Phyllochron: VariableName=[Leaf].Phyllochron
                  Constant NReallocationFactor: FixedValue=1
                    Memo
                      This model assumes that all metabolic and storage N is available for reallocation from senescing leaves.
                  PhaseLookup SenescenceRate
                    PhaseLookupValue Vegetative: Start=Emergence; End=EndCanopyDevelopment
                      Constant Rate: FixedValue=0
                    PhaseLookupValue Reproductive: Start=EndCanopyDevelopment; End=Maturity
                      DivideFunction Rate
                        VariableReference TT: VariableName=[Phenology].ThermalTime
                        SubtractFunction TTRemaining
                          ExpressionFunction TTRequired
                            Expression=[Phenology].MidGrainFilling.Target + [Phenology].LateGrainFilling.Target + [Phenology].Maturing.Target
                          ExpressionFunction TTComplete
                            Expression=[Phenology].MidGrainFilling.ProgressThroughPhase + [Phenology].LateGrainFilling.ProgressThroughPhase + [Phenology].Maturing.ProgressThroughPhase
                      Memo
                        Leaf senescence rate is calculated to ensure that all leaves are senesced by crop maturity.
                      Memo Memo1
                        There is no data on detachment rates and so a simple value was chosen to ensure that leaves were not retained in the canopy. In the future, with more data available a thermal time basis leaf detachment rate will be explored.
                  Constant DetachmentRate: FixedValue=0.05; Units=/d
                  Constant InitialWt: FixedValue=1
                  MultiplyFunction LAIDead
                    VariableReference SLA: VariableName=[Leaf].SpecificArea
                    VariableReference LeafDeadWt: VariableName=[Leaf].Dead.Wt
                  LinearInterpolationFunction MaximumNConc
                    XYPairs: X=[3, 4, 9]; Y=[0.06, 0.05, 0.03]
                    VariableReference XValue: VariableName=[Phenology].Stage
                    Memo
                      These values have been fitted to the available data. The fitted values are within the observed maximum and minimum values obtained in the FACTS Cotton experiments ([ARCHONTOULIS2020721]).
                  LinearInterpolationFunction CriticalNConc
                    XYPairs: X=[3, 4, 9]; Y=[0.06, 0.05, 0.03]
                    VariableReference XValue: VariableName=[Phenology].Stage
                  Constant MinimumNConc: FixedValue=0.02
                  Constant MaintenanceRespiration: FixedValue=0; Units=0-1
                  Constant DMConversionEfficiency: FixedValue=1; Units=0-1
                  BiomassRemoval BiomassRemovalDefaults: same as Replacements.Cotton.Shell.BiomassRemovalDefaults
                  Constant NRetranslocationFactor: FixedValue=0.5
                  Constant DMReallocationFactor: FixedValue=0
                  Constant DMRetranslocationFactor: FixedValue=0
                  Constant RemobilisationCost: FixedValue=0
                  Constant CarbonConcentration: FixedValue=0.4
                  NutrientDemandFunctions DMDemands
                    DivideFunction Structural
                      VariableReference DeltaLAI: VariableName=[Leaf].DeltaLAI
                      VariableReference SLA: VariableName=[Leaf].SpecificArea
                      Memo
                        Growth in leaf area is used to calculate the leaf dry matter demand. The same was assumed in the original crop models in APSIM. Further model development can be taken once new experimental data for metabolic, structural and storage forms are provided.
                      Memo Memo1
                        DeltaLAI describes the LAI variation over the cycle and is calculated using the Area of Largest Leaf, relative leaf area, plant number, branch number and leaf appearance rate (thermal time/phyllochron).
                    Constant Storage: FixedValue=0
                    Constant Metabolic: FixedValue=0
                    Constant QStructuralPriority: FixedValue=1
                    Constant QMetabolicPriority: FixedValue=1
                    Constant QStoragePriority: FixedValue=1
                  NutrientDemandFunctions NDemands
                    MultiplyFunction Structural
                      VariableReference MinNconc: VariableName=[Leaf].minimumNconc
                      VariableReference PotentialDMAllocation: VariableName=[Leaf].potentialDMAllocation.Structural
                    MultiplyFunction Metabolic
                      SubtractFunction MetabolicNconc
                        VariableReference CritNconc: VariableName=[Leaf].criticalNConc
                        VariableReference MinNconc: VariableName=[Leaf].minimumNconc
                      VariableReference PotentialDMAllocation: VariableName=[Leaf].potentialDMAllocation.Structural
                    StorageNDemandFunction Storage
                      Constant NitrogenDemandSwitch: FixedValue=1
                      VariableReference MaxNconc: VariableName=[Leaf].maximumNconc
                    Constant QStructuralPriority: FixedValue=1
                    Constant QMetabolicPriority: FixedValue=1
                    Constant QStoragePriority: FixedValue=1
                  LinearInterpolationFunction FrostFraction
                    XYPairs: X=[-4, 4]; Y=[1, 0]
                    VariableReference XValue: VariableName=[Weather].MinT
                  LinearInterpolationFunction SpecificArea
                    XYPairs: X=[0.1, 6]; Y=[0.03, 0.03]
                    VariableReference XValue: VariableName=[Leaf].LAI
                  PhaseLookup DeltaLAI
                    Memo
                      DeltaLAI describes the LAI variation over the cycle and is calculated using the Area of Largest Leaf, relative leaf area, plant number, branch number and leaf appearance rate (thermal time/phyllochron).
                    PhaseLookupValue Vegetative: Start=Emergence; End=EndCanopyDevelopment
                      MultiplyFunction Delta
                        VariableReference AreaLargestLeaf: VariableName=[Leaf].AreaLargestLeaf
                        PhaseLookup RelativeArea
                          PhaseLookupValue BeforeEndPod: Start=Emergence; End=StartPodDevelopment
                            LinearInterpolationFunction RelativeArea
                              XYPairs: X=[2, 7, 10, 18]; Y=[0.6666, 1, 1, 0.83]
                              VariableReference XValue: VariableName=[Leaf].NodeNumber
                          PhaseLookupValue AfterEndPod: Start=StartPodDevelopment; End=EndCanopyDevelopment
                            Constant RelativeArea: FixedValue=0.4
                        VariableReference PlantNumber: VariableName=[Cotton].SowingData.Population
                        LinearInterpolationFunction Branches
                          XYPairs: X=[0, 6, 7, 8, 9]; Y=[1, 1, 2, 2, 2]
                          VariableReference XValue: VariableName=[Leaf].NodeNumber
                        DivideFunction LAR
                          VariableReference TT: VariableName=[Phenology].VegetativeThermalTime
                          VariableReference Phyllochron: VariableName=[Leaf].Phyllochron
                    PhaseLookupValue Reproductive: Start=EndCanopyDevelopment; End=Maturity
                      Constant: FixedValue=0
                  Constant AreaLargestLeaf: FixedValue=0.006
                  Constant Phyllochron: FixedValue=45
                ReproductiveOrgan Grain: GrowthRespiration=0; MaintenanceRespiration=0
                  Biomass Live
                  Biomass Dead
                  Constant PotentialHarvestIndex: FixedValue=0.5
                  AddFunction FillingDuration
                    VariableReference EarlyGrainFillingDuration: VariableName=[Phenology].EarlyGrainFilling.Target
                    VariableReference MidGrainFillingDuration: VariableName=[Phenology].MidGrainFilling.Target
                    VariableReference LateGrainFillingDuration: VariableName=[Phenology].LateGrainFilling.Target
                  PhaseLookup DMDemandFunction
                    PhaseLookupValue GrainFilling: Start=StartGrainFilling; End=EndGrainFill
                      MultiplyFunction HIGrainDemand
                        VariableReference AboveGroundWt: VariableName=[AboveGround].Wt
                        DivideFunction HarvestIndexIncrease
                          VariableReference PotentialHarvestIndex: VariableName=[Grain].PotentialHarvestIndex
                          VariableReference FillingDuration: VariableName=[Grain].FillingDuration
                        VariableReference ThermalTime: VariableName=[Phenology].ThermalTime
                  Constant MinimumNConc: FixedValue=0.05
                  Constant MaximumNConc: FixedValue=0.058
                  Constant WaterContent: FixedValue=0.12
                  MultiplyFunction NFillingRate
                    VariableReference NConc: VariableName=[Grain].MaximumNConc
                    VariableReference DMDemand: VariableName=[Grain].DMDemandFunction
                    VariableReference DMConversionEfficiency: VariableName=[Grain].DMConversionEfficiency
                  BiomassRemoval BiomassRemovalDefaults
                    OrganBiomassRemovalType Harvest: FractionLiveToRemove=1; FractionDeadToRemove=1; FractionLiveToResidue=0; FractionDeadToResidue=0
                    OrganBiomassRemovalType Cut: FractionLiveToRemove=0; FractionDeadToRemove=0; FractionLiveToResidue=1; FractionDeadToResidue=1
                  Constant DMConversionEfficiency: FixedValue=0.89
                  Constant RemobilisationCost: FixedValue=0
                  Constant CarbonConcentration: FixedValue=0.4
                  DivideFunction HarvestIndex
                    VariableReference GrainWt: VariableName=[Grain].Wt
                    VariableReference AboveGroundWt: VariableName=[AboveGround].Wt
                  Constant MaximumPotentialGrainSize: FixedValue=0
                    Memo
                      This parameter is not used.  Grain growth is calculated from harvest index increase.
                  Constant NumberFunction: FixedValue=0
                    Memo
                      Grain number is not estimated by this model.
                  NutrientPoolFunctions DMDemandPriorityFactors
                    Constant Structural: FixedValue=1
                    Constant Metabolic: FixedValue=1
                    Constant Storage: FixedValue=1
                  NutrientPoolFunctions NDemandPriorityFactors: same as Validation.Australia.Burdekin Planting Date Experiments.BDK08P1.BDK08P1.paddock.Cotton.Grain.DMDemandPriorityFactors
                Root: GrowthRespiration=0; MaintenanceRespiration=0
                  MultiplyFunction RootFrontVelocity
                    PhaseLookup PotentialRootFrontVelocity
                      PhaseLookupValue PreEmergence: Start=Germination; End=Emergence
                        Constant Function: FixedValue=5
                      PhaseLookupValue early: Start=Emergence; End=StartGrainFilling
                        Constant Function: FixedValue=30
                      PhaseLookupValue late: Start=StartGrainFilling; End=Maturity
                        Constant Function: FixedValue=5
                    LinearInterpolationFunction WaterFactor
                      SoilWaterScale
                      XYPairs: X=[0, 0.25, 1]; Y=[1, 1, 1]
                      VariableReference XValue: VariableName=[SoilWaterScale]
                    LinearInterpolationFunction AFPSFactor
                      XYPairs: X=[0, 0.03, 1]; Y=[1, 1, 1]
                      VariableReference XValue: VariableName=[Root].AirFilledPoreSpace
                  Constant MaximumRootDepth: FixedValue=1000000
                    Memo
                      There is no intrinsic limit to maximum rooting depth.  Roots will be limited by the depth of the soil profile, or via values of XF in each layer.
                  RootShapeCylinder RootShape
                  Constant KLModifier: FixedValue=1; Units=0-1
                    Memo
                      No modification to water extraction rate is assumed in this model.
                  LinearInterpolationFunction MaxDailyNUptake
                    XYPairs: X=[0, 5]; Y=[1, 3]
                    VariableReference XValue: VariableName=[Leaf].LAI
                  Constant SenescenceRate: FixedValue=0.005; Units=/d
                    Memo
                      Roots are assumed to simply senesce at a small and constant rate during the entire growth period.
                  Constant MaximumNConc: FixedValue=0.01
                  Constant MinimumNConc: FixedValue=0.005
                  PhaseLookupValue NitrogenDemandSwitch: Start=Emergence; End=EndGrainFill
                    Constant: FixedValue=1
                  Constant KNO3: FixedValue=0.02
                  Constant KNH4: FixedValue=0
                    Memo
                      The current model version considers only NO3 uptake but NH4 option can be activated by the user . We do not expect activation of NH4 to change total plant N uptake because the nitrification rate (conversion of NH4 to NO3) is very fast in the model. In the future we will re-valuate this.
                  BiomassRemoval BiomassRemovalDefaults
                    Memo
                      Default values for biomass removals for Root are only estimates with no data behind them.
                      They are just to consider potential root senescence in response to damage.
                    OrganBiomassRemovalType Harvest: FractionLiveToRemove=0; FractionDeadToRemove=0; FractionLiveToResidue=0.2; FractionDeadToResidue=0
                    OrganBiomassRemovalType Cut: FractionLiveToRemove=0; FractionDeadToRemove=0; FractionLiveToResidue=0.2; FractionDeadToResidue=0
                  LinearInterpolationFunction NUptakeSWFactor
                    XYPairs: X=[0, 1]; Y=[0, 1]
                    VariableReference XValue: VariableName=[Root].RWC
                  Constant SpecificRootLength: FixedValue=40; Units=m/g
                  Constant DMConversionEfficiency: FixedValue=1
                  Constant MaintenanceRespirationFunction: FixedValue=1
                  Constant RemobilisationCost: FixedValue=0
                  Constant CarbonConcentration: FixedValue=0.4
                  NutrientDemandFunctions DMDemands
                    MultiplyFunction Structural
                      PartitionFractionDemandFunction DMDemandFunction
                        PhaseLookup PartitionFraction
                          PhaseLookupValue Early: Start=Emergence; End=StartFlowering
                            Constant Function: FixedValue=0.2
                          PhaseLookupValue Middle: Start=StartFlowering; End=StartGrainFilling
                            Constant Function: FixedValue=0.2
                          PhaseLookupValue Late: Start=StartGrainFilling; End=Maturity
                            Constant Function: FixedValue=0.05
                      Constant StructuralFraction: FixedValue=1
                    Constant Metabolic: FixedValue=0
                    StorageDMDemandFunction Storage
                      SubtractFunction StorageFraction
                        Constant One: FixedValue=1
                        VariableReference StructuralFraction: VariableName=[Root].DMDemands.Structural.StructuralFraction
                    Constant QStructuralPriority: FixedValue=1
                    Constant QMetabolicPriority: FixedValue=1
                    Constant QStoragePriority: FixedValue=1
                  NutrientDemandFunctions NDemands
                    MultiplyFunction Structural
                      VariableReference MinNconc: VariableName=[Root].minimumNconc
                      VariableReference PotentialDMAllocation: VariableName=[Root].potentialDMAllocation.Structural
                    MultiplyFunction Metabolic
                      SubtractFunction MetabolicNconc
                        VariableReference CritNconc: VariableName=[Root].criticalNConc
                        VariableReference MinNconc: VariableName=[Root].minimumNconc
                      VariableReference PotentialDMAllocation: VariableName=[Root].potentialDMAllocation.Structural
                    StorageNDemandFunction Storage
                      VariableReference NitrogenDemandSwitch: VariableName=[Root].nitrogenDemandSwitch
                      VariableReference MaxNconc: VariableName=[Root].maximumNconc
                    Constant QStructuralPriority: FixedValue=1
                    Constant QMetabolicPriority: FixedValue=1
                    Constant QStoragePriority: FixedValue=1
                  VariableReference CriticalNConc: VariableName=[Root].MinimumNConc
                  NutrientPoolFunctions InitialWt
                    Constant Structural: FixedValue=0.2; Units=g/plant
                    Constant Metabolic: FixedValue=0
                    Constant Storage: FixedValue=0
                Nodule
                  Constant FixationMetabolicCost: FixedValue=0
                  Constant MaximumNConc: FixedValue=0.02
                  Constant MinimumNConc: FixedValue=0.01
                  Constant SenescenceRate: FixedValue=0
                  Constant NReallocationFactor: FixedValue=0
                  PhaseLookupValue NitrogenDemandSwitch: Start=Emergence; End=EndGrainFill
                    Constant: FixedValue=1
                  BiomassRemoval BiomassRemovalDefaults: same as Validation.Australia.Burdekin Planting Date Experiments.BDK08P1.BDK08P1.paddock.Cotton.Root.BiomassRemovalDefaults
                  Constant InitialWtFunction: FixedValue=0; Units=g/m^2
                  Constant DetachmentRateFunction: FixedValue=0; Units=/d
                  Constant MaintenanceRespirationFunction: FixedValue=0; Units=0-1
                  Constant DMConversionEfficiency: FixedValue=1; Units=0-1
                  Constant NRetranslocationFactor: FixedValue=0
                  Constant DMReallocationFactor: FixedValue=0
                  Constant DMRetranslocationFactor: FixedValue=0
                  VariableReference CriticalNConc: VariableName=[Nodule].MinimumNConc
                  Constant RemobilisationCost: FixedValue=0
                  Constant CarbonConcentration: FixedValue=0.4
                  HoldFunction FixationRate: WhenToHold=StartGrainFilling
                    MinimumFunction DailyPotentialFixationRate
                      MultiplyFunction PotentialFixationRate
                        VariableReference LiveBiomass: VariableName=[AboveGroundLive].Wt
                        PhaseLookup SpecificFixationRate
                          PhaseLookupValue VegetativeGrowth: Start=Emergence; End=StartFlowering
                            Constant Rate: FixedValue=0.006
                          PhaseLookupValue ReproductiveGrowth: Start=StartFlowering; End=EndGrainFill
                            Constant Rate: FixedValue=0.002
                      Constant MaximumFixationRate: FixedValue=0.6; Units=g/g
                  NutrientPoolFunctions DMDemands
                    MultiplyFunction Structural
                      PartitionFractionDemandFunction DMDemandFunction
                        PhaseLookup PartitionFraction
                          PhaseLookupValue Early: Start=Emergence; End=StartFlowering
                            Constant Function: FixedValue=0.03
                          PhaseLookupValue Middle: Start=StartFlowering; End=StartGrainFilling
                            Constant Function: FixedValue=0.02
                          PhaseLookupValue Late: Start=StartGrainFilling; End=Maturity
                            Constant Function: FixedValue=0
                      Constant StructuralFraction: FixedValue=1; Units=g/g
                    Constant Metabolic: FixedValue=0
                    StorageDMDemandFunction Storage
                      SubtractFunction StorageFraction
                        Constant One: FixedValue=1
                        VariableReference StructuralFraction: VariableName=[Nodule].DMDemands.Structural.StructuralFraction
                  NutrientPoolFunctions NDemands
                    MultiplyFunction Structural
                      VariableReference MinNconc: VariableName=[Nodule].minimumNconc
                      VariableReference PotentialDMAllocation: VariableName=[Nodule].potentialDMAllocation.Structural
                    MultiplyFunction Metabolic
                      SubtractFunction MetabolicNconc
                        VariableReference CritNconc: VariableName=[Nodule].criticalNConc
                        VariableReference MinNconc: VariableName=[Nodule].minimumNconc
                      VariableReference PotentialDMAllocation: VariableName=[Nodule].potentialDMAllocation.Structural
                    StorageNDemandFunction Storage
                      VariableReference NitrogenDemandSwitch: VariableName=[Nodule].nitrogenDemandSwitch
                      VariableReference MaxNconc: VariableName=[Nodule].maximumNconc
                GenericOrgan Shell: IsAboveGround=true
                  Constant NReallocationFactor: FixedValue=1
                  Constant NRetranslocationFactor: FixedValue=0.5
                  Constant MaximumNConc: FixedValue=0.045
                  VariableReference CriticalNConc: VariableName=[Shell].MinimumNConc
                  Constant MinimumNConc: FixedValue=0.01
                  Constant DMRetranslocationFactor: FixedValue=0.1
                  PhaseLookupValue NitrogenDemandSwitch: Start=StartPodDevelopment; End=EndPodDevelopment
                    Constant: FixedValue=1
                  BiomassRemoval BiomassRemovalDefaults: same as Replacements.Cotton.Shell.BiomassRemovalDefaults
                  PhaseLookup SenescenceRate
                    PhaseLookupValue ReproductivePhase: Start=StartPodDevelopment; End=Maturity
                      MinimumFunction Rate
                        DivideFunction Fraction
                          VariableReference TT: VariableName=[Phenology].ThermalTime
                          SubtractFunction TTRemaining
                            ExpressionFunction ReproductiveTT
                              Expression=[Phenology].EarlyPodDevelopment.Target+[Phenology].EarlyGrainFilling.Target+[Phenology].MidGrainFilling.Target+[Phenology].LateGrainFilling.Target
                            ExpressionFunction ReproductiveTT1Complete
                              Expression=[Phenology].EarlyPodDevelopment.ProgressThroughPhase+[Phenology].EarlyGrainFilling.ProgressThroughPhase+[Phenology].MidGrainFilling.ProgressThroughPhase+[Phenology].LateGrainFilling.ProgressThroughPhase
                        Constant One: FixedValue=1
                  Constant DetachmentRateFunction: FixedValue=0; Units=/d
                  Constant MaintenanceRespirationFunction: FixedValue=0; Units=0-1
                  Constant DMConversionEfficiency: FixedValue=1; Units=0-1
                  Constant DMReallocationFactor: FixedValue=0
                  Constant RemobilisationCost: FixedValue=0
                  Constant CarbonConcentration: FixedValue=0.4
                  Constant PotentialHarvestIndex: FixedValue=0.2
                  AddFunction FillingDuration
                    VariableReference EarlyPodDevelopmentDuration: VariableName=[Phenology].EarlyPodDevelopment.Target
                    VariableReference EarlyGrainFillingDuration: VariableName=[Phenology].EarlyGrainFilling.Target
                    VariableReference MidGrainFillingDuration: VariableName=[Phenology].MidGrainFilling.Target
                  NutrientDemandFunctions DMDemands
                    MultiplyFunction Structural
                      PhaseLookup DMDemandFunction
                        PhaseLookupValue PodDevelopment: Start=StartPodDevelopment; End=EndPodDevelopment
                          MultiplyFunction HIPodDemand: same as Replacements.Cotton.Shell.DMDemands.Structural.DMDemandFunction.BollDevelopment.HIBollDemand
                      Constant StructuralFraction: FixedValue=1
                      Memo
                        Shell harvest index is used to calculate shell biomass demand, which follows the same approach than grain harvest index. It represents the fraction of shell biomass in relation to total aboveground biomass.
                    Constant Metabolic: FixedValue=0
                    StorageDMDemandFunction Storage: same as Replacements.Cotton.Shell.DMDemands.Storage
                    Constant QStructuralPriority: FixedValue=1
                    Constant QMetabolicPriority: FixedValue=1
                    Constant QStoragePriority: FixedValue=1
                  NutrientDemandFunctions NDemands: same as Replacements.Cotton.Shell.NDemands
                  RetranslocateNonStructural RetranslocateNitrogen
                  NutrientPoolFunctions InitialWt: same as Replacements.Cotton.Shell.InitialWt
                  Constant Photosynthesis: FixedValue=0
                  VariableReference initialNConcFunction: VariableName=[Shell].MinimumNConc
                GenericOrgan Stem: IsAboveGround=true
                  Constant NReallocationFactor: FixedValue=1
                  Constant NRetranslocationFactor: FixedValue=0.5
                  PhaseLookup DMRetranslocationFactor
                    PhaseLookupValue GrainFilling: Start=EndCanopyDevelopment; End=EndGrainFill
                      Constant RetranslocationFactor: FixedValue=0.2
                  LinearInterpolationFunction MaximumNConc
                    XYPairs: X=[3, 4, 5]; Y=[0.025, 0.02, 0.015]
                    VariableReference XValue: VariableName=[Phenology].Stage
                  Constant MinimumNConc: FixedValue=0.006
                  PhaseLookupValue NitrogenDemandSwitch: Start=Emergence; End=StartGrainFilling
                    Memo
                      There is no evidence of stem N storage during grain filling. Also, there is no stem structural growth during this time.
                    Constant: FixedValue=1
                  BiomassRemoval BiomassRemovalDefaults: same as Replacements.Cotton.Shell.BiomassRemovalDefaults
                  PhaseLookup SenescenceRate
                    PhaseLookupValue PostCanopyPhase: Start=EndCanopyDevelopment; End=Maturity
                      MinimumFunction Rate
                        DivideFunction Fraction
                          VariableReference TT: VariableName=[Phenology].ThermalTime
                          SubtractFunction TTRemaining
                            ExpressionFunction PostCanopyTT
                              Expression=[Phenology].EarlyPodDevelopment.Target+[Phenology].EarlyGrainFilling.Target+[Phenology].MidGrainFilling.Target+[Phenology].LateGrainFilling.Target
                            ExpressionFunction PostCanopyTTComplete
                              Expression=[Phenology].MidGrainFilling.ProgressThroughPhase+[Phenology].LateGrainFilling.ProgressThroughPhase
                        Constant One: FixedValue=1
                  Constant DetachmentRateFunction: FixedValue=0; Units=/d
                  Constant MaintenanceRespirationFunction: FixedValue=0; Units=0-1
                  Constant DMConversionEfficiency: FixedValue=1; Units=0-1
                  Constant DMReallocationFactor: FixedValue=0
                  VariableReference CriticalNConc: VariableName=[Stem].MinimumNConc
                  Constant RemobilisationCost: FixedValue=0
                  Constant CarbonConcentration: FixedValue=0.4
                  NutrientDemandFunctions DMDemands
                    MultiplyFunction Structural
                      PhaseLookup Fraction
                        PhaseLookupValue StemGrowthPhase: Start=Emergence; End=StartPodDevelopment
                          Constant Fraction: FixedValue=0.75
                        PhaseLookupValue PodAndGrainGrowth: Start=StartPodDevelopment; End=EndGrainFill
                          Constant Fraction: FixedValue=0
                      VariableReference DMDemand: VariableName=[Stem].PotentialGrowth
                    Constant Metabolic: FixedValue=0
                    MultiplyFunction Storage
                      VariableReference DMDemand: VariableName=[Stem].PotentialGrowth
                      SubtractFunction StorageFraction
                        Constant One: FixedValue=1
                        VariableReference StructuralFraction: VariableName=[Stem].DMDemands.Structural.Fraction
                    Constant QStructuralPriority: FixedValue=1
                    Constant QMetabolicPriority: FixedValue=1
                    Constant QStoragePriority: FixedValue=1
                  NutrientDemandFunctions NDemands
                    MultiplyFunction Structural
                      VariableReference MinNconc: VariableName=[Stem].minimumNconc
                      VariableReference PotentialDMAllocation: VariableName=[Stem].potentialDMAllocation.Structural
                    MultiplyFunction Metabolic
                      SubtractFunction MetabolicNconc
                        VariableReference CritNconc: VariableName=[Stem].criticalNConc
                        VariableReference MinNconc: VariableName=[Stem].minimumNconc
                      VariableReference PotentialDMAllocation: VariableName=[Stem].potentialDMAllocation.Structural
                    StorageNDemandFunction Storage
                      VariableReference NitrogenDemandSwitch: VariableName=[Stem].nitrogenDemandSwitch
                      VariableReference MaxNconc: VariableName=[Stem].maximumNconc
                    Constant QStructuralPriority: FixedValue=1
                    Constant QMetabolicPriority: FixedValue=1
                    Constant QStoragePriority: FixedValue=1
                  PartitionFractionDemandFunction PotentialGrowth
                    PhaseLookup PartitionFraction
                      PhaseLookupValue StemGrowthPhase: Start=Emergence; End=EndPodDevelopment
                        Constant StemFraction: FixedValue=0.4
                      PhaseLookupValue GrainFilling: Start=EndPodDevelopment; End=EndGrainFill
                        Constant StemFraction: FixedValue=0
                  RetranslocateNonStructural RetranslocateNitrogen
                  NutrientPoolFunctions InitialWt: same as Replacements.Cotton.Shell.InitialWt
                  Constant Photosynthesis: FixedValue=0
                  VariableReference initialNConcFunction: VariableName=[Stem].MinimumNConc
                CompositeBiomass AboveGround: OrganNames=[Leaf, Stem, Grain, Shell]; IncludeLive=true; IncludeDead=true
                CompositeBiomass BelowGround: OrganNames=[Root, Nodule]; IncludeLive=true; IncludeDead=true
                CompositeBiomass AboveGroundLive: OrganNames=[Leaf, Stem, Grain, Shell]; IncludeLive=true; IncludeDead=false
                CompositeBiomass Total: OrganNames=[Leaf, Stem, Grain, Shell, Root, Nodule]; IncludeLive=true; IncludeDead=true
                CompositeBiomass TotalLive: OrganNames=[Leaf, Stem, Grain, Shell, Root, Nodule]; IncludeLive=true; IncludeDead=false
                CompositeBiomass TotalDead: OrganNames=[Leaf, Stem, Grain, Shell, Root, Nodule]; IncludeLive=false; IncludeDead=true
                CompositeBiomass Pod: OrganNames=[Shell, Grain]; IncludeLive=true; IncludeDead=true
                Constant MortalityRate: FixedValue=0
                Constant SeedMortalityRate: FixedValue=0
                Folder Cultivars
                  Folder Australia
                    Cultivar Buchanan
                      Command:
                        [Phenology].Vegetative.Target.FixedValue = 480
                        [Phenology].EarlyFlowering.Target.FixedValue = 100
                        [Phenology].EarlyGrainFilling.Target.FractionofGrainfilling.FixedValue = 0.015
                        [Phenology].LateGrainFilling.Target.EntireGrainfillPeriod.FixedValue = 467
                        [Phenology].VegetativePhotoperiodModifier.XYPairs.X = 12.39, 15.61
                        [Phenology].ReproductivePhotoperiodModifier.XYPairs.X = 12.39, 15.61
                        [Phenology].MidGrainFilling.Target.FractionofMidToLateGrainfilling.FixedValue=0.33
                        [Grain].MaximumNConc.FixedValue = 0.067
                        [Stem].PotentialGrowth.PartitionFraction.StemGrowthPhase.StemFraction.FixedValue = 0.5
                        [Leaf].AreaLargestLeaf.FixedValue=0.009
                    Cultivar Djakal
                      Command:
                        [Phenology].Vegetative.Target.FixedValue = 380
                        [Phenology].EarlyFlowering.Target.FixedValue = 100
                        [Phenology].EarlyGrainFilling.Target.FractionofGrainfilling.FixedValue = 0.05
                        [Phenology].LateGrainFilling.Target.EntireGrainfillPeriod.FixedValue = 405
                        [Phenology].VegetativePhotoperiodModifier.XYPairs.X = 13.75, 17
                        [Phenology].ReproductivePhotoperiodModifier.XYPairs.X = 11.9, 15.5
                        [Leaf].AreaLargestLeaf.FixedValue=0.009
                    Cultivar Davis
                      Command:
                        [Phenology].Vegetative.Target.FixedValue = 480
                        [Phenology].EarlyFlowering.Target.FixedValue = 100
                        [Phenology].EarlyGrainFilling.Target.FractionofGrainfilling.FixedValue = 0.015
                        [Phenology].LateGrainFilling.Target.EntireGrainfillPeriod.FixedValue = 467
                        [Phenology].VegetativePhotoperiodModifier.XYPairs.X = 12.39, 15.61
                        [Phenology].ReproductivePhotoperiodModifier.XYPairs.X = 12.39, 15.61
                        [Phenology].MidGrainFilling.Target.FractionofMidToLateGrainfilling.FixedValue=0.33
                        [Grain].MaximumNConc.FixedValue = 0.067
                        [Stem].PotentialGrowth.PartitionFraction.StemGrowthPhase.StemFraction.FixedValue = 0.5
                        [Leaf].AreaLargestLeaf.FixedValue=0.012
                    Cultivar Hooper_MG40
                      Command:
                        [Phenology].Vegetative.Target.FixedValue = 380
                        [Phenology].EarlyFlowering.Target.FixedValue = 80
                        [Phenology].EarlyGrainFilling.Target.FractionofGrainfilling.FixedValue = 0.05
                        [Phenology].LateGrainFilling.Target.EntireGrainfillPeriod.FixedValue = 440
                        [Phenology].VegetativePhotoperiodModifier.XYPairs.X = 13.26, 16.67
                        [Phenology].ReproductivePhotoperiodModifier.XYPairs.X = 13.26, 16.67
                        [Leaf].AreaLargestLeaf.FixedValue=0.009
                    Cultivar Stephens_MG40
                      Command:
                        [Phenology].Vegetative.Target.FixedValue = 360
                        [Phenology].EarlyFlowering.Target.FixedValue = 80
                        [Phenology].EarlyGrainFilling.Target.FractionofGrainfilling.FixedValue = 0.05
                        [Phenology].LateGrainFilling.Target.EntireGrainfillPeriod.FixedValue = 440
                        [Phenology].VegetativePhotoperiodModifier.XYPairs.X = 13.26, 16.67
                        [Phenology].ReproductivePhotoperiodModifier.XYPairs.X = 13.26, 16.67
                        [Leaf].AreaLargestLeaf.FixedValue=0.009
                    Cultivar FiskebyV
                      Command:
                        [Phenology].Vegetative.Target.FixedValue = 285
                        [Phenology].EarlyFlowering.Target.FixedValue = 80
                        [Phenology].EarlyGrainFilling.Target.FractionofGrainfilling.FixedValue = 0.05
                        [Phenology].LateGrainFilling.Target.EntireGrainfillPeriod.FixedValue = 405
                        [Phenology].VegetativePhotoperiodModifier.XYPairs.X = 13.75, 18
                        [Phenology].ReproductivePhotoperiodModifier.XYPairs.X = 13.75, 18
                      Memo
                        Early-maturing, photoperiod-insensitive cultivar developed in Sweden for high latitude environments
                    Cultivar F148_7
                      Command:
                        [Phenology].Vegetative.Target.FixedValue = 314
                        [Phenology].EarlyFlowering.Target.FixedValue = 80
                        [Phenology].EarlyGrainFilling.Target.FractionofGrainfilling.FixedValue = 0.05
                        [Phenology].LateGrainFilling.Target.EntireGrainfillPeriod.FixedValue = 485
                        [Phenology].VegetativePhotoperiodModifier.XYPairs.X = 13.75, 17
                        [Phenology].ReproductivePhotoperiodModifier.XYPairs.X = 12, 18
                        [Leaf].AreaLargestLeaf.FixedValue=0.009
                      Memo
                        Indeterminate breeding selection from the national Cotton breeding program combining phytophthora resistance, earliness,
                        culinary quality, and yield
                    Cultivar Bowyer
                      Command:
                        [Phenology].Vegetative.Target.FixedValue = 377
                        [Phenology].EarlyFlowering.Target.FixedValue = 80
                        [Phenology].EarlyGrainFilling.Target.FractionofGrainfilling.FixedValue = 0.05
                        [Phenology].LateGrainFilling.Target.EntireGrainfillPeriod.FixedValue = 405
                        [Phenology].VegetativePhotoperiodModifier.XYPairs.X = 13.75, 15.5
                        [Phenology].ReproductivePhotoperiodModifier.XYPairs.X = 11.9, 15.5
                      Memo
                        Brown hilum cultivar, adapted to southern New South Wales, released by K McWhirter in 1982
                    Cultivar Bunya
                      Command:
                        [Phenology].Vegetative.Target.FixedValue = 550
                        [Phenology].EarlyFlowering.Target.FixedValue = 80
                        [Phenology].EarlyGrainFilling.Target.FractionofGrainfilling.FixedValue = 0.05
                        [Phenology].LateGrainFilling.Target.EntireGrainfillPeriod.FixedValue = 405
                        [Phenology].VegetativePhotoperiodModifier.XYPairs.X = 13.75, 18
                        [Phenology].ReproductivePhotoperiodModifier.XYPairs.X = 10.9, 15.5
                        [Leaf].AreaLargestLeaf.FixedValue=0.009
                      Memo
                        Culinary cultivar released in 2006 by CSIRO with broad adaptation from northern New South Wales to northern Queensland
                    Cultivar Cowrie
                      Command:
                        [Phenology].Vegetative.Target.FixedValue = 390
                        [Phenology].EarlyFlowering.Target.FixedValue = 80
                        [Phenology].EarlyGrainFilling.Target.FractionofGrainfilling.FixedValue = 0.05
                        [Phenology].LateGrainFilling.Target.EntireGrainfillPeriod.FixedValue = 425
                        [Phenology].VegetativePhotoperiodModifier.XYPairs.X = 12.75, 16
                        [Phenology].ReproductivePhotoperiodModifier.XYPairs.X = 12.75, 16
                        [Leaf].AreaLargestLeaf.FixedValue=0.009
                      Memo
                        Light hilum cultivar released by theNewSouth Wales Department of Agriculture for the coastal Northern Rivers District inNewSouth Wales
                    Cultivar Soya791
                      Command:
                        [Phenology].Vegetative.Target.FixedValue = 430
                        [Phenology].EarlyFlowering.Target.FixedValue = 80
                        [Phenology].EarlyGrainFilling.Target.FractionofGrainfilling.FixedValue = 0.05
                        [Phenology].LateGrainFilling.Target.EntireGrainfillPeriod.FixedValue = 425
                        [Phenology].VegetativePhotoperiodModifier.XYPairs.X = 12.75, 15.3
                        [Phenology].ReproductivePhotoperiodModifier.XYPairs.X = 12.75, 15.3
                        [Leaf].AreaLargestLeaf.FixedValue=0.009
                    Cultivar Manark
                      Command:
                        [Phenology].Vegetative.Target.FixedValue = 440
                        [Phenology].EarlyFlowering.Target.FixedValue = 80
                        [Phenology].EarlyGrainFilling.Target.FractionofGrainfilling.FixedValue = 0.05
                        [Phenology].LateGrainFilling.Target.EntireGrainfillPeriod.FixedValue = 425
                        [Phenology].VegetativePhotoperiodModifier.XYPairs.X = 12.75, 15
                        [Phenology].ReproductivePhotoperiodModifier.XYPairs.X = 12.75, 15
                        [Leaf].AreaLargestLeaf.FixedValue=0.009
                    Cultivar Warrigal
                      Command:
                        [Phenology].Vegetative.Target.FixedValue = 490
                        [Phenology].EarlyFlowering.Target.FixedValue = 80
                        [Phenology].EarlyGrainFilling.Target.FractionofGrainfilling.FixedValue = 0.05
                        [Phenology].LateGrainFilling.Target.EntireGrainfillPeriod.FixedValue = 425
                        [Phenology].VegetativePhotoperiodModifier.XYPairs.X = 12.75, 15
                        [Phenology].ReproductivePhotoperiodModifier.XYPairs.X = 12.75, 15
                        [Leaf].AreaLargestLeaf.FixedValue=0.009
                    Cultivar Leichhardt
                      Command:
                        [Phenology].Vegetative.Target.FixedValue = 806
                        [Phenology].EarlyFlowering.Target.FixedValue = 80
                        [Phenology].EarlyGrainFilling.Target.FractionofGrainfilling.FixedValue = 0.05
                        [Phenology].LateGrainFilling.Target.EntireGrainfillPeriod.FixedValue = 425
                        [Phenology].VegetativePhotoperiodModifier.XYPairs.X = 12.75, 14.7
                        [Phenology].ReproductivePhotoperiodModifier.XYPairs.X = 12.75, 14.7
                        [Leaf].AreaLargestLeaf.FixedValue=0.009
                    Cultivar Djakal1
                      Command:
                        [Phenology].Vegetative.Target.FixedValue = 332
                        [Phenology].EarlyFlowering.Target.FixedValue = 80
                        [Phenology].EarlyGrainFilling.Target.FractionofGrainfilling.FixedValue = 0.05
                        [Phenology].LateGrainFilling.Target.EntireGrainfillPeriod.FixedValue = 440
                        [Phenology].VegetativePhotoperiodModifier.XYPairs.X = 13.26, 16.67
                        [Phenology].ReproductivePhotoperiodModifier.XYPairs.X = 13.26, 16.67
                        [Leaf].AreaLargestLeaf.FixedValue=0.009
                  Folder USA
                    Cultivar Trial_MG00
                      Command:
                        [Phenology].Vegetative.Target.FixedValue = 268
                        [Phenology].EarlyFlowering.Target.FixedValue = 76
                        [Phenology].EarlyGrainFilling.Target.FractionofGrainfilling.FixedValue = 0.05
                        [Phenology].LateGrainFilling.Target.EntireGrainfillPeriod.FixedValue = 432
                        [Phenology].VegetativePhotoperiodModifier.XYPairs.X = 14.43, 21.19
                        [Phenology].ReproductivePhotoperiodModifier.XYPairs.X = 14.43, 21.19
                    Cultivar Lambert_MG0
                      Command:
                        [Phenology].Vegetative.Target.FixedValue = 294
                        [Phenology].EarlyFlowering.Target.FixedValue = 81
                        [Phenology].EarlyGrainFilling.Target.FractionofGrainfilling.FixedValue = 0.05
                        [Phenology].LateGrainFilling.Target.EntireGrainfillPeriod.FixedValue = 442
                        [Phenology].VegetativePhotoperiodModifier.XYPairs.X = 14.29, 20.14
                        [Phenology].ReproductivePhotoperiodModifier.XYPairs.X = 14.29, 20.14
                    Cultivar IA1006_MG10
                      Command:
                        [Phenology].Vegetative.Target.FixedValue = 336
                        [Phenology].EarlyFlowering.Target.FixedValue = 118
                        [Phenology].EarlyGrainFilling.Target.FractionofGrainfilling.FixedValue = 0.05
                        [Phenology].LateGrainFilling.Target.EntireGrainfillPeriod.FixedValue = 518
                        [Phenology].VegetativePhotoperiodModifier.XYPairs.X = 14.37, 19.30
                        [Phenology].ReproductivePhotoperiodModifier.XYPairs.X = 14.37, 19.30
                    Cultivar IA2008_MG20
                      Command:
                        [Phenology].Vegetative.Target.FixedValue = 329
                        [Phenology].EarlyFlowering.Target.FixedValue = 150
                        [Phenology].EarlyGrainFilling.Target.FractionofGrainfilling.FixedValue = 0.05
                        [Phenology].LateGrainFilling.Target.EntireGrainfillPeriod.FixedValue = 580
                        [Phenology].VegetativePhotoperiodModifier.XYPairs.X = 13.92, 17.93
                        [Phenology].ReproductivePhotoperiodModifier.XYPairs.X = 13.92, 17.93
                    Cultivar PioneerP22T61_MG22
                      Command:
                        [Phenology].Vegetative.Target.FixedValue = 328
                        [Phenology].EarlyFlowering.Target.FixedValue = 106
                        [Phenology].EarlyGrainFilling.Target.FractionofGrainfilling.FixedValue = 0.3
                        [Phenology].LateGrainFilling.Target.EntireGrainfillPeriod.FixedValue = 499
                        [Phenology].VegetativePhotoperiodModifier.XYPairs.X = 13.59, 17.6
                        [Phenology].ReproductivePhotoperiodModifier.XYPairs.X = 13.59, 17.6
                    Cultivar PioneerP22T69R_MG22
                      Command:
                        [Phenology].Vegetative.Target.FixedValue = 328
                        [Phenology].EarlyFlowering.Target.FixedValue = 106
                        [Phenology].EarlyGrainFilling.Target.FractionofGrainfilling.FixedValue = 0.35
                        [Phenology].LateGrainFilling.Target.EntireGrainfillPeriod.FixedValue = 580
                        [Phenology].VegetativePhotoperiodModifier.XYPairs.X = 13.59, 17.6
                        [Phenology].ReproductivePhotoperiodModifier.XYPairs.X = 13.59, 17.6
                    Cultivar Pioneer92MGI_MG26
                      Command:
                        [Phenology].Vegetative.Target.FixedValue = 271
                        [Phenology].EarlyFlowering.Target.FixedValue = 120
                        [Phenology].EarlyGrainFilling.Target.FractionofGrainfilling.FixedValue = 0.125
                        [Phenology].LateGrainFilling.Target.EntireGrainfillPeriod.FixedValue = 529
                        [Phenology].VegetativePhotoperiodModifier.XYPairs.X = 13.77, 17.57
                        [Phenology].ReproductivePhotoperiodModifier.XYPairs.X = 13.77, 17.57
                    Cultivar PioneerP92Y75_MG27
                      Command:
                        [Phenology].Vegetative.Target.FixedValue = 328
                        [Phenology].EarlyFlowering.Target.FixedValue = 106
                        [Phenology].EarlyGrainFilling.Target.FractionofGrainfilling.FixedValue = 0.14
                        [Phenology].LateGrainFilling.Target.EntireGrainfillPeriod.FixedValue = 499
                        [Phenology].VegetativePhotoperiodModifier.XYPairs.X = 13.59, 17.6
                        [Phenology].ReproductivePhotoperiodModifier.XYPairs.X = 13.59, 17.6
                    Cultivar Macon_MG30
                      Command:
                        [Phenology].Vegetative.Target.FixedValue = 367
                        [Phenology].EarlyFlowering.Target.FixedValue = 163
                        [Phenology].EarlyGrainFilling.Target.FractionofGrainfilling.FixedValue = 0.175
                        [Phenology].LateGrainFilling.Target.EntireGrainfillPeriod.FixedValue = 607
                        [Phenology].VegetativePhotoperiodModifier.XYPairs.X = 14.05, 17.56
                        [Phenology].ReproductivePhotoperiodModifier.XYPairs.X = 14.05, 17.56
                    Cultivar PioneerP93M11_MG31
                      Command:
                        [Phenology].Vegetative.Target.FixedValue = 250
                        [Phenology].EarlyFlowering.Target.FixedValue = 110
                        [Phenology].EarlyGrainFilling.Target.FractionofGrainfilling.FixedValue = 0.30
                        [Phenology].LateGrainFilling.Target.EntireGrainfillPeriod.FixedValue = 457
                        [Phenology].VegetativePhotoperiodModifier.XYPairs.X = 13.4, 16.0
                        [Phenology].ReproductivePhotoperiodModifier.XYPairs.X = 13.4, 16.0
                        [Grain].MaximumNConc.FixedValue = 0.065
                        [Shell].PotentialHarvestIndex.FixedValue = 0.5
                        [Leaf].AreaLargestLeaf.FixedValue=0.013
                    Cultivar Becks321NRR_MG32
                      Command:
                        [Phenology].Vegetative.Target.FixedValue = 272
                        [Phenology].EarlyFlowering.Target.FixedValue = 117
                        [Phenology].EarlyGrainFilling.Target.FractionofGrainfilling.FixedValue = 0.20
                        [Phenology].LateGrainFilling.Target.EntireGrainfillPeriod.FixedValue = 522
                        [Phenology].VegetativePhotoperiodModifier.XYPairs.X = 13.45, 18.0
                        [Phenology].ReproductivePhotoperiodModifier.XYPairs.X = 13.45, 18.0
                    Cultivar PioneerP932T16R_MG32
                      Command:
                        [Phenology].Vegetative.Target.FixedValue = 328
                        [Phenology].EarlyFlowering.Target.FixedValue = 106
                        [Phenology].EarlyGrainFilling.Target.FractionofGrainfilling.FixedValue = 0.40
                        [Phenology].LateGrainFilling.Target.EntireGrainfillPeriod.FixedValue = 499
                        [Phenology].VegetativePhotoperiodModifier.XYPairs.X = 13.59, 17.6
                        [Phenology].ReproductivePhotoperiodModifier.XYPairs.X = 13.59, 17.6
                    Cultivar Becks367NRR_MG37
                      Command:
                        [Phenology].Vegetative.Target.FixedValue = 267
                        [Phenology].EarlyFlowering.Target.FixedValue = 112
                        [Phenology].EarlyGrainFilling.Target.FractionofGrainfilling.FixedValue = 0.26
                        [Phenology].LateGrainFilling.Target.EntireGrainfillPeriod.FixedValue = 506
                        [Phenology].VegetativePhotoperiodModifier.XYPairs.X = 13.27, 17.2
                        [Phenology].ReproductivePhotoperiodModifier.XYPairs.X = 13.27, 17.2
                    Cultivar AsgrowAG4403_MG40
                      Command:
                        [Phenology].Vegetative.Target.FixedValue = 292
                        [Phenology].EarlyFlowering.Target.FixedValue = 123
                        [Phenology].EarlyGrainFilling.Target.FractionofGrainfilling.FixedValue = 0.30
                        [Phenology].LateGrainFilling.Target.EntireGrainfillPeriod.FixedValue = 535
                        [Phenology].VegetativePhotoperiodModifier.XYPairs.X = 13.09, 16.49
                        [Phenology].ReproductivePhotoperiodModifier.XYPairs.X = 13.09, 16.49
                    Cultivar HornbeckHBK4891_MG40: same as Validation.Australia.Burdekin Planting Date Experiments.BDK08P1.BDK08P1.paddock.Cotton.Cultivars.USA.AsgrowAG4403_MG40
                    Cultivar Pioneer94B01_MG40
                      Command:
                        [Phenology].Vegetative.Target.FixedValue = 322
                        [Phenology].EarlyFlowering.Target.FixedValue = 143
                        [Phenology].EarlyGrainFilling.Target.FractionofGrainfilling.FixedValue = 0.30
                        [Phenology].LateGrainFilling.Target.EntireGrainfillPeriod.FixedValue = 567
                        [Phenology].VegetativePhotoperiodModifier.XYPairs.X = 13.05, 16.46
                        [Phenology].ReproductivePhotoperiodModifier.XYPairs.X = 13.05, 16.46
                    Cultivar PioneerP9504_MG50
                      Command:
                        [Phenology].Vegetative.Target.FixedValue = 404
                        [Phenology].EarlyFlowering.Target.FixedValue = 112
                        [Phenology].EarlyGrainFilling.Target.FractionofGrainfilling.FixedValue = 0.30
                        [Phenology].LateGrainFilling.Target.EntireGrainfillPeriod.FixedValue = 505
                        [Phenology].VegetativePhotoperiodModifier.XYPairs.X = 12.83, 16.13
                        [Phenology].ReproductivePhotoperiodModifier.XYPairs.X = 12.83, 16.13
                    Cultivar AsgrowAG5701_MG50
                      Command:
                        [Phenology].Vegetative.Target.FixedValue = 404
                        [Phenology].EarlyFlowering.Target.FixedValue = 131
                        [Phenology].EarlyGrainFilling.Target.FractionofGrainfilling.FixedValue = 0.30
                        [Phenology].LateGrainFilling.Target.EntireGrainfillPeriod.FixedValue = 549
                        [Phenology].VegetativePhotoperiodModifier.XYPairs.X = 12.83, 16.13
                        [Phenology].ReproductivePhotoperiodModifier.XYPairs.X = 12.83, 16.13
                    Cultivar Hutcheson_MG50
                      Command:
                        [Phenology].Vegetative.Target.FixedValue = 438
                        [Phenology].EarlyFlowering.Target.FixedValue = 112
                        [Phenology].EarlyGrainFilling.Target.FractionofGrainfilling.FixedValue = 0.30
                        [Phenology].LateGrainFilling.Target.EntireGrainfillPeriod.FixedValue = 505
                        [Phenology].VegetativePhotoperiodModifier.XYPairs.X = 12.58, 15.88
                        [Phenology].ReproductivePhotoperiodModifier.XYPairs.X = 12.58, 15.88
                    Cultivar NK622_MG60
                      Command:
                        [Phenology].Vegetative.Target.FixedValue = 436
                        [Phenology].EarlyFlowering.Target.FixedValue = 93
                        [Phenology].EarlyGrainFilling.Target.FractionofGrainfilling.FixedValue = 0.30
                        [Phenology].LateGrainFilling.Target.EntireGrainfillPeriod.FixedValue = 467
                        [Phenology].VegetativePhotoperiodModifier.XYPairs.X = 12.39, 15.61
                        [Phenology].ReproductivePhotoperiodModifier.XYPairs.X = 12.39, 15.61
                  Folder China
                    Cultivar Nandou12
                      Command:
                        [Phenology].Vegetative.Target.FixedValue = 500
                        [Phenology].EarlyFlowering.Target.FixedValue = 120
                        [Phenology].EarlyPodDevelopment.Target.FixedValue = 180
                        [Phenology].EarlyGrainFilling.Target.FractionofGrainfilling.FixedValue = 0.2
                        [Phenology].LateGrainFilling.Target.EntireGrainfillPeriod.FixedValue = 440
                        [Phenology].VegetativePhotoperiodModifier.XYPairs.X = 12.63, 15.13
                        [Phenology].ReproductivePhotoperiodModifier.XYPairs.X = 12.63, 15.13
                        [Phenology].MidGrainFilling.Target.FractionofMidToLateGrainfilling.FixedValue=0.45
                        [Leaf].AreaLargestLeaf.FixedValue=0.013
                        [Grain].PotentialHarvestIndex.FixedValue=0.35
                    Cultivar Texuan13
                      Command:
                        [Phenology].Vegetative.Target.FixedValue = 500
                        [Phenology].EarlyFlowering.Target.FixedValue = 200
                        [Phenology].EarlyPodDevelopment.Target.FixedValue = 170
                        [Phenology].EarlyGrainFilling.Target.FractionofGrainfilling.FixedValue = 0.2
                        [Phenology].LateGrainFilling.Target.EntireGrainfillPeriod.FixedValue = 460
                        [Phenology].VegetativePhotoperiodModifier.XYPairs.X = 12.63, 15.13
                        [Phenology].ReproductivePhotoperiodModifier.XYPairs.X = 12.63, 15.13
                        [Phenology].MidGrainFilling.Target.FractionofMidToLateGrainfilling.FixedValue=0.45
                        [Leaf].AreaLargestLeaf.FixedValue=0.013
                        [Grain].PotentialHarvestIndex.FixedValue=0.35
                    Cultivar Jiuyuehuang
                      Command:
                        [Phenology].Vegetative.Target.FixedValue = 540
                        [Phenology].EarlyFlowering.Target.FixedValue = 140
                        [Phenology].EarlyPodDevelopment.Target.FixedValue = 140
                        [Phenology].EarlyGrainFilling.Target.FractionofGrainfilling.FixedValue = 0.2
                        [Phenology].LateGrainFilling.Target.EntireGrainfillPeriod.FixedValue = 420
                        [Phenology].VegetativePhotoperiodModifier.XYPairs.X = 12.94, 15.44
                        [Phenology].ReproductivePhotoperiodModifier.XYPairs.X = 12.94, 15.44
                        [Phenology].MidGrainFilling.Target.FractionofMidToLateGrainfilling.FixedValue=0.45
                        [Leaf].AreaLargestLeaf.FixedValue=0.013
                        [Grain].PotentialHarvestIndex.FixedValue=0.25
                    Cultivar Hedou19
                      Command:
                        [Phenology].Vegetative.Target.FixedValue = 370
                        [Phenology].EarlyFlowering.Target.FixedValue = 120
                        [Phenology].EarlyPodDevelopment.Target.FixedValue = 180
                        [Phenology].EarlyGrainFilling.Target.FractionofGrainfilling.FixedValue = 0.361
                        [Phenology].LateGrainFilling.Target.EntireGrainfillPeriod.FixedValue = 600
                        [Phenology].VegetativePhotoperiodModifier.XYPairs.X = 13.57, 16.07
                        [Phenology].ReproductivePhotoperiodModifier.XYPairs.X = 13.57, 16.07
                        [Phenology].MidGrainFilling.Target.FractionofMidToLateGrainfilling.FixedValue=0.45
                        [Leaf].AreaLargestLeaf.FixedValue=0.02
                        [Leaf].Phyllochron.FixedValue=45
                  Folder Generic
                    Cultivar Generic_MG000
                      Command:
                        [Phenology].Vegetative.Target.FixedValue = 310
                        [Phenology].EarlyFlowering.Target.FixedValue = 100
                        [Phenology].EarlyGrainFilling.Target.FractionofGrainfilling.FixedValue = 0.475
                        [Phenology].LateGrainFilling.Target.EntireGrainfillPeriod.FixedValue = 590
                        [Phenology].VegetativePhotoperiodModifier.XYPairs.X = 14.6, 22.35
                        [Phenology].ReproductivePhotoperiodModifier.XYPairs.X = 14.6, 22.35
                    Cultivar Generic_MG00
                      Command:
                        [Phenology].Vegetative.Target.FixedValue = 320
                        [Phenology].EarlyFlowering.Target.FixedValue = 100
                        [Phenology].EarlyGrainFilling.Target.FractionofGrainfilling.FixedValue = 0.467
                        [Phenology].LateGrainFilling.Target.EntireGrainfillPeriod.FixedValue = 600
                        [Phenology].VegetativePhotoperiodModifier.XYPairs.X = 14.35, 21.11
                        [Phenology].ReproductivePhotoperiodModifier.XYPairs.X = 14.35, 21.11
                    Cultivar Generic_MG0
                      Command:
                        [Phenology].Vegetative.Target.FixedValue = 336
                        [Phenology].EarlyFlowering.Target.FixedValue = 120
                        [Phenology].EarlyGrainFilling.Target.FractionofGrainfilling.FixedValue = 0.422
                        [Phenology].LateGrainFilling.Target.EntireGrainfillPeriod.FixedValue = 616
                        [Phenology].VegetativePhotoperiodModifier.XYPairs.X = 14.1, 19.95
                        [Phenology].ReproductivePhotoperiodModifier.XYPairs.X = 14.1, 19.95
                    Cultivar Generic_MG1
                      Command:
                        [Phenology].Vegetative.Target.FixedValue = 340
                        [Phenology].EarlyFlowering.Target.FixedValue = 120
                        [Phenology].EarlyGrainFilling.Target.FractionofGrainfilling.FixedValue = 0.411
                        [Phenology].LateGrainFilling.Target.EntireGrainfillPeriod.FixedValue = 632
                        [Phenology].VegetativePhotoperiodModifier.XYPairs.X = 13.84, 18.77
                        [Phenology].ReproductivePhotoperiodModifier.XYPairs.X = 13.84, 18.77
                    Cultivar Generic_MG2
                      Command:
                        [Phenology].Vegetative.Target.FixedValue = 348
                        [Phenology].EarlyFlowering.Target.FixedValue = 120
                        [Phenology].EarlyGrainFilling.Target.FractionofGrainfilling.FixedValue = 0.386
                        [Phenology].LateGrainFilling.Target.EntireGrainfillPeriod.FixedValue = 648
                        [Phenology].VegetativePhotoperiodModifier.XYPairs.X = 13.59, 17.61
                        [Phenology].ReproductivePhotoperiodModifier.XYPairs.X = 13.59, 17.61
                    Cultivar Generic_MG3
                      Command:
                        [Phenology].Vegetative.Target.FixedValue = 380
                        [Phenology].EarlyFlowering.Target.FixedValue = 120
                        [Phenology].EarlyGrainFilling.Target.FractionofGrainfilling.FixedValue = 0.361
                        [Phenology].LateGrainFilling.Target.EntireGrainfillPeriod.FixedValue = 664
                        [Phenology].VegetativePhotoperiodModifier.XYPairs.X = 13.4, 16.91
                        [Phenology].ReproductivePhotoperiodModifier.XYPairs.X = 13.4, 16.91
                    Cultivar Generic_MG4
                      Command:
                        [Phenology].Vegetative.Target.FixedValue = 388
                        [Phenology].EarlyFlowering.Target.FixedValue = 140
                        [Phenology].EarlyGrainFilling.Target.FractionofGrainfilling.FixedValue = 0.324
                        [Phenology].LateGrainFilling.Target.EntireGrainfillPeriod.FixedValue = 664
                        [Phenology].VegetativePhotoperiodModifier.XYPairs.X = 13.1, 16.49
                        [Phenology].ReproductivePhotoperiodModifier.XYPairs.X = 13.1, 16.49
                    Cultivar Generic_MG5
                      Command:
                        [Phenology].Vegetative.Target.FixedValue = 396
                        [Phenology].EarlyFlowering.Target.FixedValue = 160
                        [Phenology].EarlyGrainFilling.Target.FractionofGrainfilling.FixedValue = 0.072
                        [Phenology].LateGrainFilling.Target.EntireGrainfillPeriod.FixedValue = 696
                        [Phenology].VegetativePhotoperiodModifier.XYPairs.X = 12.83, 16.13
                        [Phenology].ReproductivePhotoperiodModifier.XYPairs.X = 12.83, 16.13
                    Cultivar Generic_MG6
                      Command:
                        [Phenology].Vegetative.Target.FixedValue = 404
                        [Phenology].EarlyFlowering.Target.FixedValue = 180
                        [Phenology].EarlyGrainFilling.Target.FractionofGrainfilling.FixedValue = 0.056
                        [Phenology].LateGrainFilling.Target.EntireGrainfillPeriod.FixedValue = 712
                        [Phenology].VegetativePhotoperiodModifier.XYPairs.X = 12.58, 15.8
                        [Phenology].ReproductivePhotoperiodModifier.XYPairs.X = 12.58, 15.8
                    Cultivar Generic_MG7
                      Command:
                        [Phenology].Vegetative.Target.FixedValue = 416
                        [Phenology].EarlyFlowering.Target.FixedValue = 200
                        [Phenology].EarlyGrainFilling.Target.FractionofGrainfilling.FixedValue = 0.055
                        [Phenology].LateGrainFilling.Target.EntireGrainfillPeriod.FixedValue = 728
                        [Phenology].VegetativePhotoperiodModifier.XYPairs.X = 12.33, 15.46
                        [Phenology].ReproductivePhotoperiodModifier.XYPairs.X = 12.33, 15.46
                    Cultivar Generic_MG8
                      Command:
                        [Phenology].Vegetative.Target.FixedValue = 430
                        [Phenology].EarlyFlowering.Target.FixedValue = 200
                        [Phenology].EarlyGrainFilling.Target.FractionofGrainfilling.FixedValue = 0.054
                        [Phenology].LateGrainFilling.Target.EntireGrainfillPeriod.FixedValue = 744
                        [Phenology].VegetativePhotoperiodModifier.XYPairs.X = 12.07, 15.1
                        [Phenology].ReproductivePhotoperiodModifier.XYPairs.X = 12.07, 15.1
                    Cultivar Generic_MG9
                      Command:
                        [Phenology].Vegetative.Target.FixedValue = 460
                        [Phenology].EarlyFlowering.Target.FixedValue = 200
                        [Phenology].EarlyGrainFilling.Target.FractionofGrainfilling.FixedValue = 0.053
                        [Phenology].LateGrainFilling.Target.EntireGrainfillPeriod.FixedValue = 748
                        [Phenology].VegetativePhotoperiodModifier.XYPairs.X = 11.88, 14.82
                        [Phenology].ReproductivePhotoperiodModifier.XYPairs.X = 11.88, 14.82
                    Cultivar Generic_MG10
                      Command:
                        [Phenology].Vegetative.Target.FixedValue = 470
                        [Phenology].EarlyFlowering.Target.FixedValue = 200
                        [Phenology].EarlyGrainFilling.Target.FractionofGrainfilling.FixedValue = 0.053
                        [Phenology].LateGrainFilling.Target.EntireGrainfillPeriod.FixedValue = 748
                        [Phenology].VegetativePhotoperiodModifier.XYPairs.X = 11.78, 14.65
                        [Phenology].ReproductivePhotoperiodModifier.XYPairs.X = 11.78, 14.65
              Report DailyReport: same as Validation.Australia.Burdekin.Burdekin2008.Burdekin2008Base.paddock.DailyReport
              Report HarvestReport: EventNames=[Cotton].Harvesting
                VariableNames:
                  [Clock].Today
                  [Cotton].Structure.MainStemPrimordiaNo
                  [Cotton].Phenology.NFF
                  [Cotton].Script.FinalTag
        Experiment BDK08P2 (disabled)
          Memo
            Cultivars:

            S24 = Manark

            S60 = Warrigal

            S70 = Leichhardt

            S80 = Djakal1

            =================

            Plant density:

            S24 = 6.7

            S60 = 6.6

            S70 = 6.7

            S80 = 6.8

            Average = 6.7
          Factors
            Permutation
              Factor Cv
                Specification=[Sowing].Script.CultivarName = Siokra_24BRF, Sicala_60BRF, Sicot_70BRF, Sicot_80
          Simulation BDK08P2
            Clock: Start=2007-11-01; End=2008-08-31
            Summary summaryfile
            Weather: FileName=QLD_BDK2008-12.met
            SoilArbitrator Soil Arbitrator
            MicroClimate: a_interception=0; b_interception=1; c_interception=0; d_interception=0; SoilHeatFluxFraction=0.4; MinimumHeightDiffForNewLayer=0; NightInterceptionFraction=0.5; ReferenceHeight=2
            Zone paddock: Area=1; Slope=0; AspectAngle=0; Altitude=50
              Manager Sowing
                Crop = [Cotton]
                SowDate = 19-dec
                CultivarName = Cotton_Generic
                SowingDepth = 50
                RowSpacing = 750
                Population = 6.7
                script: same as in Validation.Australia.Narrabri Deficit Experiments.NAR0607.Narrabri deficit experiment 200607.paddock.Sowing
              Fertiliser
              Operations FertiliserEvents
                2007-12-19  [Fertiliser].Apply(90, Fertiliser.Types.UreaN,10);
                2008-01-07  [Fertiliser].Apply(90, Fertiliser.Types.NH4N,10);
              Irrigation
              Manager AutomaticIrrigation
                triggerDeficit = 80
                allowIrrigation = True
                seasonStart = 19-dec
                seasonEnd = 27-may
                seasonsAllocation = 10000
                targetDeficit = 100
                returndays = 0
                maximumAmount = 1000
                depthPAWC = 500
                script: same as in Validation.Australia.Narrabri Deficit Experiments.NAR0607.Narrabri deficit experiment 200607.paddock.AutomaticIrrigation
              Operations IrrigationEvents
                2007-12-19  ;
                2008-03-11  ;
                2008-03-19  ;
                2008-03-25  ;
                2008-04-01  ;
                2008-04-09  ;
                2008-04-16  ;
                2008-04-24  ;
                2008-05-10  ;
                2008-05-20  ;
                2008-05-27  ;
              Manager Harvesting: same as Validation.Australia.Burdekin Planting Date Experiments.BDK08P1.BDK08P1.paddock.Harvesting
              Soil Ayr Loam (Estimated): same as Validation.Australia.Burdekin Planting Date Experiments.BDK08P1.BDK08P1.paddock.Ayr Loam (Estimated)
              SurfaceOrganicMatter: InitialResidueName=maize; InitialResidueType=maize; InitialResidueMass=2000; InitialStandingFraction=0; InitialCPR=0; InitialCNR=33
              Plant Cotton: same as Validation.Australia.Burdekin Planting Date Experiments.BDK08P1.BDK08P1.paddock.Cotton
              Report DailyReport: same as Validation.Australia.Burdekin.Burdekin2008.Burdekin2008Base.paddock.DailyReport
              Report HarvestReport: EventNames=[Cotton].Harvesting
                VariableNames:
                  [Clock].Today
                  [Cotton].Structure.MainStemPrimordiaNo
                  [Cotton].Phenology.NFF
                  [Cotton].Script.FinalTag
        Experiment BDK08P3 (disabled)
          Memo
            Cultivars:

            S24 = Manark

            S60 = Warrigal

            S70 = Leichhardt

            S80 = Djakal1

            =================

            Plant density:

            S24 = 6.2

            S60 = 6.0

            S70 = 5.8

            S80 = 5.8

            Average = 5.95
          Factors
            Permutation
              Factor Cv
                Specification=[Sowing].Script.CultivarName = Siokra_24BRF, Sicala_60BRF, Sicot_70BRF, Sicot_80
          Simulation BDK08P3
            Clock: Start=2007-11-01; End=2008-08-31
            Summary summaryfile
            Weather: FileName=QLD_BDK2008-12.met
            SoilArbitrator Soil Arbitrator
            MicroClimate: a_interception=0; b_interception=1; c_interception=0; d_interception=0; SoilHeatFluxFraction=0.4; MinimumHeightDiffForNewLayer=0; NightInterceptionFraction=0.5; ReferenceHeight=2
            Zone paddock: Area=1; Slope=0; AspectAngle=0; Altitude=50
              Manager Sowing
                Crop = [Cotton]
                SowDate = 7-jan
                CultivarName = Cotton_Generic
                SowingDepth = 50
                RowSpacing = 750
                Population = 5.95
                script: same as in Validation.Australia.Narrabri Deficit Experiments.NAR0607.Narrabri deficit experiment 200607.paddock.Sowing
              Fertiliser
              Operations FertiliserEvents
                2008-01-07  [Fertiliser].Apply(90, Fertiliser.Types.UreaN,10);
                2008-01-12  [Fertiliser].Apply(90, Fertiliser.Types.NH4N,10);
              Irrigation
              Manager AutomaticIrrigation
                triggerDeficit = 80
                allowIrrigation = True
                seasonStart = 11-mar
                seasonEnd = 8-jun
                seasonsAllocation = 10000
                targetDeficit = 100
                returndays = 0
                maximumAmount = 1000
                depthPAWC = 500
                script: same as in Validation.Australia.Narrabri Deficit Experiments.NAR0607.Narrabri deficit experiment 200607.paddock.AutomaticIrrigation
              Operations IrrigationEvents
                2008-03-11  ;
                2008-03-19  ;
                2008-03-25  ;
                2008-04-01  ;
                2008-04-09  ;
                2008-04-16  ;
                2008-04-24  ;
                2008-05-10  ;
                2008-05-19  ;
                2008-05-28  ;
                2008-06-08  ;
              Manager Harvesting: same as Validation.Australia.Burdekin Planting Date Experiments.BDK08P1.BDK08P1.paddock.Harvesting
              Soil Ayr Loam (Estimated): same as Validation.Australia.Burdekin Planting Date Experiments.BDK08P1.BDK08P1.paddock.Ayr Loam (Estimated)
              SurfaceOrganicMatter: InitialResidueName=maize; InitialResidueType=maize; InitialResidueMass=2000; InitialStandingFraction=0; InitialCPR=0; InitialCNR=33
              Plant Cotton: PlantType=Cotton; IsEnding=false; DaysAfterEnding=0
              Report DailyReport: same as Validation.Australia.Burdekin.Burdekin2008.Burdekin2008Base.paddock.DailyReport
              Report HarvestReport: EventNames=[Cotton].Harvesting
                VariableNames:
                  [Clock].Today
                  [Cotton].Structure.MainStemPrimordiaNo
                  [Cotton].Phenology.NFF
                  [Cotton].Script.FinalTag
        Experiment BDK09P1
          Memo
            Cultivars:

            S24 = Manark

            S60 = Warrigal

            S70 = Leichhardt

            S74 = Soya791

            =================

            Plant density:

            S24 = 6.3

            S60 = 6.2

            S70 = 6.3

            S74 = 6.1

            Average = 6.2
          Factors
            Permutation
              Factor Cv
                Specification=[Sowing].Script.CultivarName = Siokra_24BRF, Sicala_60BRF, Sicot_70BRF, Sicot_74BRF
          Simulation BDK09P1
            Clock: Start=2008-11-01; End=2009-08-31
            Summary summaryfile
            Weather: FileName=QLD_BDK2008-12.met
            SoilArbitrator Soil Arbitrator
            MicroClimate: a_interception=0; b_interception=1; c_interception=0; d_interception=0; SoilHeatFluxFraction=0.4; MinimumHeightDiffForNewLayer=0; NightInterceptionFraction=0.5; ReferenceHeight=2
            Zone paddock: Area=1; Slope=0; AspectAngle=0; Altitude=50
              Manager Sowing
                Crop = [Cotton]
                SowDate = 1-dec
                CultivarName = Cotton_Generic
                SowingDepth = 50
                RowSpacing = 750
                Population = 6.2
                script: same as in Validation.Australia.Narrabri Deficit Experiments.NAR0607.Narrabri deficit experiment 200607.paddock.Sowing
              Fertiliser
              Operations FertiliserEvents
                2008-12-01  [Fertiliser].Apply(90, Fertiliser.Types.UreaN,10);
                2008-12-18  [Fertiliser].Apply(90, Fertiliser.Types.NH4N,10);
              Irrigation
              Manager AutomaticIrrigation
                triggerDeficit = 80
                allowIrrigation = True
                seasonStart = 1-dec
                seasonEnd = 26-apr
                seasonsAllocation = 10000
                targetDeficit = 100
                returndays = 0
                maximumAmount = 1000
                depthPAWC = 500
                script: same as in Validation.Australia.Narrabri Deficit Experiments.NAR0607.Narrabri deficit experiment 200607.paddock.AutomaticIrrigation
              Operations IrrigationEvents (disabled)
                2008-12-01  ;
                2009-03-06  ;
                2009-03-13  ;
                2009-03-21  ;
                2009-03-28  ;
                2009-04-04  ;
                2009-04-12  ;
                2009-04-19  ;
                2009-04-26  ;
              Manager Harvesting: same as Validation.Australia.Narrabri Deficit Experiments.NAR0607.Narrabri deficit experiment 200607.paddock.Harvesting
              Soil Ayr Loam (Estimated): SoilType=Grey Vertosol; Site=Ayr Queensland; NearestTown=Ayr, QLD  4807; Region=Burdekin; State=Queensland; Country=Australia; NaturalVegetation=Flood Plain; Latitude=-19.576; Longitude=147.405; LocationAccuracy=+/- 20m; DataSource=CSIRO Plant Industry, Approximation Only
                Comments=Based on Myall Vale heavy clay.  Adjusted based on observations by Dr Stephen Yeates (CSIRO Plant Industry)
                Physical
                  Thickness  BD     AirDry  LL15   DUL    SAT
                  150        1.527  0.08    0.186  0.279  0.38
                  100        1.393  0.099   0.196  0.289  0.38
                  100        1.393  0.12    0.215  0.289  0.371
                  250        1.437  0.14    0.215  0.297  0.381
                  200        1.483  0.15    0.231  0.306  0.392
                  200        1.453  0.15    0.231  0.316  0.388
                  300        1.506  0.15    0.282  0.306  0.377
                  200        1.49   0.15    0.301  0.313  0.377
                  200        1.537  0.15    0.306  0.322  0.377
                  SoilCrop CottonSoil: LL=[0.19, 0.205, 0.223, 0.223, 0.238, 0.24, 0.29, 0.305, 0.31]; KL=[0.1, 0.1, 0.1, 0.1, 0.09, 0.07, 0.05, 0.05, 0.05]; XF=[1, 1, 1, 1, 1, 1, 1, 1, 1]
                WaterBalance SoilWater: SummerDate=1-Nov; SummerU=6; SummerCona=3.5; WinterDate=1-Apr; WinterU=4; WinterCona=2.5; DiffusConst=40; DiffusSlope=16; Salb=0.12; CN2Bare=73; CNRed=20; CNCov=0.8; PSIDul=-100; Thickness=[150, 100, 100, 250, 200, 200, 300, 200, 200]; SWCON=[0.3, 0.3, 0.3, 0.3, 0.3, 0.3, 0.3, 0.3, 0.3]
                Organic: FOMCNRatio=40; CarbonUnits=Total
                  Thickness  Carbon  SoilCNRatio  FBiom  FInert  FOM
                  150        0.88    12           0.04   0.4     261.633
                  100        0.76    12           0.02   0.6     219.307
                  100        0.62    12           0.02   0.8     183.828
                  250        0.32    12           0.02   1       118.253
                  200        0.12    12           0.01   1       83.087
                  200        0.1     12           0.01   1       58.378
                  300        0.05    12           0.01   1       34.382
                  200        0.039   12           0.01   1       24.157
                  200        0.036   12           0.01   1       16.973
                Chemical: Thickness=[150, 100, 100, 250, 200, 200, 300, 200, 200]; PH=[8.9, 9.2, 9.3, 9, 8.8, 7.5, 8.4, 8.4, 8.4]; PHUnits=Water
                  PH source: Estimated based on local knowledge (layer 1, 2, 3, 4, 5, 6, 7)
                Nutrient
                Water: Thickness=[150, 100, 100, 250, 200, 200, 300, 200, 200]; RelativeTo=Soybean; FilledFromTop=true
                  InitialValues=[0.279, 0.289, 0.289, 0.251, 0.238, 0.24, 0.29, 0.305, 0.31]
                CERESSoilTemperature Temperature
                Solute NO3: Thickness=[100, 200, 300]; InitialValues=[11, 9, 3]; InitialValuesUnits=ppm; WaterTableConcentration=0; D0=0; DepthConstant=0; MaxDepthSoluteAccessible=0; RunoffEffectivenessAtMovingSolute=0; MaxEffectiveRunoff=0
                Solute NH4: Thickness=[100, 200, 300]; InitialValues=[3.46, 2.97, 2.34]; InitialValuesUnits=ppm; WaterTableConcentration=0; D0=0; DepthConstant=0; MaxDepthSoluteAccessible=0; RunoffEffectivenessAtMovingSolute=0; MaxEffectiveRunoff=0
                Solute Urea: Thickness=[100]; InitialValues=[0]; InitialValuesUnits=kg/ha; WaterTableConcentration=0; D0=0; DepthConstant=0; MaxDepthSoluteAccessible=0; RunoffEffectivenessAtMovingSolute=0; MaxEffectiveRunoff=0
              SurfaceOrganicMatter: InitialResidueName=maize; InitialResidueType=maize; InitialResidueMass=2000; InitialStandingFraction=0; InitialCPR=0; InitialCNR=33
              Plant Cotton: PlantType=Cotton; IsEnding=false; DaysAfterEnding=0
              Report DailyReport: same as Validation.Australia.MyallVale.MyallVale2006.MyallVale2006Base.paddock.DailyReport
              Report HarvestReport: EventNames=[Cotton].Harvesting
                VariableNames:
                  [Clock].Today
                  [Cotton].Structure.MainStemPrimordiaNo
                  [Cotton].Phenology.NFF
                  [Cotton].Script.FinalTag
        Experiment BDK09P2
          Memo
            Cultivars:

            S24 = Manark

            S60 = Warrigal

            S70 = Leichhardt

            S74 = Soya791

            =================

            Plant density:

            S24 = 6.0

            S60 = 6.0

            S70 = 6.2

            S74 = 6.3

            Average = 6.1
          Factors
            Permutation
              Factor Cv
                Specification=[Sowing].Script.CultivarName = Siokra_24BRF, Sicala_60BRF, Sicot_70BRF, Sicot_74BRF
          Simulation BDK09P2
            Clock: Start=2008-11-01; End=2009-08-31
            Summary summaryfile
            Weather: FileName=QLD_BDK2008-12.met
            SoilArbitrator Soil Arbitrator
            MicroClimate: a_interception=0; b_interception=1; c_interception=0; d_interception=0; SoilHeatFluxFraction=0.4; MinimumHeightDiffForNewLayer=0; NightInterceptionFraction=0.5; ReferenceHeight=2
            Zone paddock: Area=1; Slope=0; AspectAngle=0; Altitude=50
              Manager Sowing
                Crop = [Cotton]
                SowDate = 18-dec
                CultivarName = Cotton_Generic
                SowingDepth = 50
                RowSpacing = 750
                Population = 6.1
                script: same as in Validation.Australia.Narrabri Deficit Experiments.NAR0607.Narrabri deficit experiment 200607.paddock.Sowing
              Fertiliser
              Operations FertiliserEvents
                2008-12-18  [Fertiliser].Apply(90, Fertiliser.Types.UreaN,10);
                2009-01-08  [Fertiliser].Apply(90, Fertiliser.Types.NH4N,10);
              Irrigation
              Manager AutomaticIrrigation
                triggerDeficit = 80
                allowIrrigation = True
                seasonStart = 6-mar
                seasonEnd = 1-may
                seasonsAllocation = 10000
                targetDeficit = 100
                returndays = 0
                maximumAmount = 1000
                depthPAWC = 500
                script: same as in Validation.Australia.Narrabri Deficit Experiments.NAR0607.Narrabri deficit experiment 200607.paddock.AutomaticIrrigation
              Operations IrrigationEvents (disabled)
                2009-03-06  ;
                2009-03-13  ;
                2009-03-21  ;
                2009-03-28  ;
                2009-04-04  ;
                2009-04-12  ;
                2009-04-19  ;
                2009-04-26  ;
                2009-05-01  ;
              Manager Harvesting: same as Validation.Australia.Narrabri Deficit Experiments.NAR0607.Narrabri deficit experiment 200607.paddock.Harvesting
              Soil Ayr Loam (Estimated): same as Validation.Australia.Burdekin Planting Date Experiments.BDK09P1.BDK09P1.paddock.Ayr Loam (Estimated)
              SurfaceOrganicMatter: InitialResidueName=maize; InitialResidueType=maize; InitialResidueMass=2000; InitialStandingFraction=0; InitialCPR=0; InitialCNR=33
              Plant Cotton: PlantType=Cotton; IsEnding=false; DaysAfterEnding=0
              Report DailyReport: same as Validation.Australia.MyallVale.MyallVale2006.MyallVale2006Base.paddock.DailyReport
              Report HarvestReport: EventNames=[Cotton].Harvesting
                VariableNames:
                  [Clock].Today
                  [Cotton].Structure.MainStemPrimordiaNo
                  [Cotton].Phenology.NFF
                  [Cotton].Script.FinalTag
        Experiment BDK09P3
          Memo
            Cultivars:

            S24 = Manark

            S60 = Warrigal

            S70 = Leichhardt

            S74 = Soya791

            =================

            Plant density:

            S24 = 6.3

            S60 = 6.4

            S70 = 6.2

            S74 = 6.1

            Average = 6.25
          Factors
            Permutation
              Factor Cv
                Specification=[Sowing].Script.CultivarName = Siokra_24BRF, Sicala_60BRF, Sicot_70BRF, Sicot_74BRF
          Simulation BDK09P3
            Clock: Start=2008-11-01; End=2009-09-30
            Summary summaryfile
            Weather: FileName=QLD_BDK2008-12.met
            SoilArbitrator Soil Arbitrator
            MicroClimate: a_interception=0; b_interception=1; c_interception=0; d_interception=0; SoilHeatFluxFraction=0.4; MinimumHeightDiffForNewLayer=0; NightInterceptionFraction=0.5; ReferenceHeight=2
            Zone paddock: Area=1; Slope=0; AspectAngle=0; Altitude=50
              Manager Sowing
                Crop = [Cotton]
                SowDate = 7-jan
                CultivarName = Cotton_Generic
                SowingDepth = 50
                RowSpacing = 750
                Population = 6.25
                script: same as in Validation.Australia.Narrabri Deficit Experiments.NAR0607.Narrabri deficit experiment 200607.paddock.Sowing
              Fertiliser
              Operations FertiliserEvents
                2009-01-07  [Fertiliser].Apply(90, Fertiliser.Types.UreaN,10);
                2008-02-21  [Fertiliser].Apply(90, Fertiliser.Types.NH4N,10);
                2008-02-21  [Fertiliser].Apply(40, Fertiliser.Types.UreaN,10);
              Irrigation
              Manager AutomaticIrrigation
                triggerDeficit = 80
                allowIrrigation = True
                seasonStart = 6-mar
                seasonEnd = 29-may
                seasonsAllocation = 10000
                targetDeficit = 100
                returndays = 0
                maximumAmount = 1000
                depthPAWC = 500
                script: same as in Validation.Australia.Narrabri Deficit Experiments.NAR0607.Narrabri deficit experiment 200607.paddock.AutomaticIrrigation
              Operations IrrigationEvents (disabled)
                2009-03-06  ;
                2009-03-13  ;
                2009-03-21  ;
                2009-03-28  ;
                2009-04-04  ;
                2009-04-12  ;
                2009-04-19  ;
                2009-04-26  ;
                2009-05-02  ;
                2009-05-14  ;
                2009-05-23  ;
                2009-05-29  ;
              Manager Harvesting: same as Validation.Australia.Narrabri Deficit Experiments.NAR0607.Narrabri deficit experiment 200607.paddock.Harvesting
              Soil Ayr Loam (Estimated): same as Validation.Australia.Burdekin Planting Date Experiments.BDK09P1.BDK09P1.paddock.Ayr Loam (Estimated)
              SurfaceOrganicMatter: InitialResidueName=maize; InitialResidueType=maize; InitialResidueMass=2000; InitialStandingFraction=0; InitialCPR=0; InitialCNR=33
              Plant Cotton: PlantType=Cotton; IsEnding=false; DaysAfterEnding=0
              Report DailyReport: same as Validation.Australia.MyallVale.MyallVale2006.MyallVale2006Base.paddock.DailyReport
              Report HarvestReport: EventNames=[Cotton].Harvesting
                VariableNames:
                  [Clock].Today
                  [Cotton].Structure.MainStemPrimordiaNo
                  [Cotton].Phenology.NFF
                  [Cotton].Script.FinalTag
        Experiment BDK10P1
          Memo
            Cultivars:

            S24 = Manark

            S60 = Warrigal

            S70 = Leichhardt

            S74 = Soya791

            =================

            Plant density:

            S24 = 5.2

            S60 = 5.1

            S70 = 5.3

            S74 = 5.1

            Average = 5.18
          Factors
            Permutation
              Factor Cv
                Specification=[Sowing].Script.CultivarName = Siokra_24BRF, Sicala_60BRF, Sicot_70BRF, Sicot_74BRF
          Simulation BDK10P1
            Clock: Start=2009-11-01; End=2010-08-31
            Summary summaryfile
            Weather: FileName=QLD_BDK2008-12.met
            SoilArbitrator Soil Arbitrator
            MicroClimate: a_interception=0; b_interception=1; c_interception=0; d_interception=0; SoilHeatFluxFraction=0.4; MinimumHeightDiffForNewLayer=0; NightInterceptionFraction=0.5; ReferenceHeight=2
            Zone paddock: Area=1; Slope=0; AspectAngle=0; Altitude=50
              Manager Sowing
                RowSpacing = 750
                Crop = [Cotton]
                SowDate = 1-dec
                CultivarName = Davis
                SowingDepth = 50
                Population = 5.18
                script: same as in Validation.Australia.Narrabri Deficit Experiments.NAR0607.Narrabri deficit experiment 200607.paddock.Sowing
              Fertiliser
              Operations FertiliserEvents
                2009-12-01  [Fertiliser].Apply(95, Fertiliser.Types.UreaN,10);
                2010-01-10  [Fertiliser].Apply(95, Fertiliser.Types.NH4N,10);
              Irrigation
              Manager AutomaticIrrigation
                allowIrrigation = True
                seasonStart = 1-dec
                seasonEnd = 10-may
                seasonsAllocation = 10000
                triggerDeficit = 80
                targetDeficit = 100
                returndays = 0
                maximumAmount = 1000
                depthPAWC = 500
                script: same as in Validation.Australia.Narrabri Deficit Experiments.NAR0607.Narrabri deficit experiment 200607.paddock.AutomaticIrrigation
              Operations IrrigationEvents (disabled)
                2009-12-01  ;
                2009-12-15  ;
                2010-01-14  ;
                2010-01-20  ;
                2010-03-14  ;
                2010-04-03  ;
                2010-04-12  ;
                2010-04-21  ;
                2010-04-29  ;
                2010-05-10  ;
              Manager Harvesting: same as Validation.Australia.Narrabri Deficit Experiments.NAR0607.Narrabri deficit experiment 200607.paddock.Harvesting
              Soil Ayr Loam (Estimated): SoilType=Grey Vertosol; Site=Ayr Queensland; NearestTown=Ayr, QLD  4807; Region=Burdekin; State=Queensland; Country=Australia; NaturalVegetation=Flood Plain; Latitude=-19.576; Longitude=147.405; LocationAccuracy=+/- 20m; DataSource=CSIRO Plant Industry, Approximation Only
                Comments=Based on Myall Vale heavy clay.  Adjusted based on observations by Dr Stephen Yeates (CSIRO Plant Industry)
                Physical: same as Validation.Australia.Burdekin Planting Date Experiments.BDK09P1.BDK09P1.paddock.Ayr Loam (Estimated).Physical
                WaterBalance SoilWater: same as Validation.Australia.Burdekin Planting Date Experiments.BDK09P1.BDK09P1.paddock.Ayr Loam (Estimated).SoilWater
                Organic: same as Validation.Australia.Burdekin Planting Date Experiments.BDK09P1.BDK09P1.paddock.Ayr Loam (Estimated).Organic
                Chemical: same as Validation.Australia.Burdekin Planting Date Experiments.BDK09P1.BDK09P1.paddock.Ayr Loam (Estimated).Chemical
                Nutrient
                Water: Thickness=[150, 100, 100, 250, 200, 200, 300, 200, 200]; RelativeTo=LL15; FilledFromTop=true
                  InitialValues=[0.279, 0.289, 0.289, 0.251, 0.238, 0.24, 0.29, 0.305, 0.31]
                CERESSoilTemperature Temperature
                Solute NO3: Thickness=[100, 200, 300]; InitialValues=[11, 9, 3]; InitialValuesUnits=ppm; WaterTableConcentration=0; D0=0; DepthConstant=0; MaxDepthSoluteAccessible=0; RunoffEffectivenessAtMovingSolute=0; MaxEffectiveRunoff=0
                Solute NH4: Thickness=[100, 200, 300]; InitialValues=[3.46, 2.97, 2.34]; InitialValuesUnits=ppm; WaterTableConcentration=0; D0=0; DepthConstant=0; MaxDepthSoluteAccessible=0; RunoffEffectivenessAtMovingSolute=0; MaxEffectiveRunoff=0
                Solute Urea: Thickness=[100]; InitialValues=[0]; InitialValuesUnits=kg/ha; WaterTableConcentration=0; D0=0; DepthConstant=0; MaxDepthSoluteAccessible=0; RunoffEffectivenessAtMovingSolute=0; MaxEffectiveRunoff=0
              SurfaceOrganicMatter: InitialResidueName=maize; InitialResidueType=maize; InitialResidueMass=2000; InitialStandingFraction=0; InitialCPR=0; InitialCNR=33
              Plant Cotton: PlantType=Cotton; IsEnding=false; DaysAfterEnding=0
              Report DailyReport: same as Validation.Australia.MyallVale.MyallVale2006.MyallVale2006Base.paddock.DailyReport
              Report HarvestReport: EventNames=[Cotton].Harvesting
                VariableNames:
                  [Clock].Today
                  [Cotton].Structure.MainStemPrimordiaNo
                  [Cotton].Phenology.NFF
                  [Cotton].Script.FinalTag
        Experiment BDK10P2
          Memo
            Cultivars:

            S24 = Manark

            S60 = Warrigal

            S70 = Leichhardt

            S74 = Soya791

            =================

            Plant density:

            S24 = 5.5

            S60 = 5.2

            S70 = 5.3

            S74 = 5.3

            Average = 5.3
          Factors
            Permutation
              Factor Cv
                Specification=[Sowing].Script.CultivarName = Siokra_24BRF, Sicala_60BRF, Sicot_70BRF, Sicot_74BRF
          Simulation BDK10P2
            Clock: Start=2009-11-01; End=2010-08-31
            Summary summaryfile
            Weather: FileName=QLD_BDK2008-12.met
            SoilArbitrator Soil Arbitrator
            MicroClimate: a_interception=0; b_interception=1; c_interception=0; d_interception=0; SoilHeatFluxFraction=0.4; MinimumHeightDiffForNewLayer=0; NightInterceptionFraction=0.5; ReferenceHeight=2
            Zone paddock: Area=1; Slope=0; AspectAngle=0; Altitude=50
              Manager Sowing
                Crop = [Cotton]
                SowDate = 19-dec
                CultivarName = Cotton_Generic
                SowingDepth = 50
                RowSpacing = 750
                Population = 5.3
                script: same as in Validation.Australia.Narrabri Deficit Experiments.NAR0607.Narrabri deficit experiment 200607.paddock.Sowing
              Fertiliser
              Operations FertiliserEvents
                2009-12-19  [Fertiliser].Apply(95, Fertiliser.Types.UreaN,10);
                2010-01-19  [Fertiliser].Apply(95, Fertiliser.Types.NH4N,10);
              Irrigation
              Manager AutomaticIrrigation
                triggerDeficit = 80
                allowIrrigation = True
                seasonStart = 19-dec
                seasonEnd = 29-apr
                seasonsAllocation = 10000
                targetDeficit = 100
                returndays = 0
                maximumAmount = 1000
                depthPAWC = 500
                script: same as in Validation.Australia.Narrabri Deficit Experiments.NAR0607.Narrabri deficit experiment 200607.paddock.AutomaticIrrigation
              Operations IrrigationEvents (disabled)
                2009-12-19  ;
                2010-01-14  ;
                2010-01-20  ;
                2010-03-14  ;
                2010-04-03  ;
                2010-04-12  ;
                2010-04-21  ;
                2010-04-29  ;
              Manager Harvesting: same as Validation.Australia.Narrabri Deficit Experiments.NAR0607.Narrabri deficit experiment 200607.paddock.Harvesting
              Soil Ayr Loam (Estimated): SoilType=Grey Vertosol; Site=Ayr Queensland; NearestTown=Ayr, QLD  4807; Region=Burdekin; State=Queensland; Country=Australia; NaturalVegetation=Flood Plain; Latitude=-19.576; Longitude=147.405; LocationAccuracy=+/- 20m; DataSource=CSIRO Plant Industry, Approximation Only
                Comments=Based on Myall Vale heavy clay.  Adjusted based on observations by Dr Stephen Yeates (CSIRO Plant Industry)
                Physical: same as Validation.Australia.Burdekin Planting Date Experiments.BDK09P1.BDK09P1.paddock.Ayr Loam (Estimated).Physical
                WaterBalance SoilWater: same as Validation.Australia.Burdekin Planting Date Experiments.BDK09P1.BDK09P1.paddock.Ayr Loam (Estimated).SoilWater
                Organic: same as Validation.Australia.Burdekin Planting Date Experiments.BDK09P1.BDK09P1.paddock.Ayr Loam (Estimated).Organic
                Chemical: same as Validation.Australia.Burdekin Planting Date Experiments.BDK09P1.BDK09P1.paddock.Ayr Loam (Estimated).Chemical
                Nutrient
                Water: Thickness=[150, 100, 100, 250, 200, 200, 300, 200, 200]; RelativeTo=LL15; FilledFromTop=true
                  InitialValues=[0.279, 0.289, 0.289, 0.251, 0.231, 0.231, 0.282, 0.301, 0.306]
                CERESSoilTemperature Temperature
                Solute NO3: Thickness=[100, 200, 300]; InitialValues=[11, 9, 3]; InitialValuesUnits=ppm; WaterTableConcentration=0; D0=0; DepthConstant=0; MaxDepthSoluteAccessible=0; RunoffEffectivenessAtMovingSolute=0; MaxEffectiveRunoff=0
                Solute NH4: Thickness=[100, 200, 300]; InitialValues=[3.46, 2.97, 2.34]; InitialValuesUnits=ppm; WaterTableConcentration=0; D0=0; DepthConstant=0; MaxDepthSoluteAccessible=0; RunoffEffectivenessAtMovingSolute=0; MaxEffectiveRunoff=0
                Solute Urea: Thickness=[100]; InitialValues=[0]; InitialValuesUnits=kg/ha; WaterTableConcentration=0; D0=0; DepthConstant=0; MaxDepthSoluteAccessible=0; RunoffEffectivenessAtMovingSolute=0; MaxEffectiveRunoff=0
              SurfaceOrganicMatter: InitialResidueName=maize; InitialResidueType=maize; InitialResidueMass=2000; InitialStandingFraction=0; InitialCPR=0; InitialCNR=33
              Plant Cotton: PlantType=Cotton; IsEnding=false; DaysAfterEnding=0
              Report DailyReport: same as Validation.Australia.MyallVale.MyallVale2006.MyallVale2006Base.paddock.DailyReport
              Report HarvestReport: EventNames=[Cotton].Harvesting
                VariableNames:
                  [Clock].Today
                  [Cotton].Structure.MainStemPrimordiaNo
                  [Cotton].Phenology.NFF
                  [Cotton].Script.FinalTag
        Experiment BDK10P3
          Memo
            Cultivars:

            S24 = Manark

            S60 = Warrigal

            S70 = Leichhardt

            S74 = Soya791

            =================

            Plant density:

            S24 = 6.0

            S60 = 6.1

            S70 = 6.2

            S74 = 5.9

            Average = 6.05
          Factors
            Permutation
              Factor Cv
                Specification=[Sowing].Script.CultivarName = Siokra_24BRF, Sicala_60BRF, Sicot_70BRF, Sicot_74BRF
          Simulation BDK10P3
            Clock: Start=2009-11-01; End=2010-08-31
            Summary summaryfile
            Weather: FileName=QLD_BDK2008-12.met
            SoilArbitrator Soil Arbitrator
            MicroClimate: a_interception=0; b_interception=1; c_interception=0; d_interception=0; SoilHeatFluxFraction=0.4; MinimumHeightDiffForNewLayer=0; NightInterceptionFraction=0.5; ReferenceHeight=2
            Zone paddock: Area=1; Slope=0; AspectAngle=0; Altitude=50
              Manager Sowing
                Crop = [Cotton]
                SowDate = 7-jan
                CultivarName = Cotton_Generic
                SowingDepth = 50
                RowSpacing = 750
                Population = 6.05
                script: same as in Validation.Australia.Narrabri Deficit Experiments.NAR0607.Narrabri deficit experiment 200607.paddock.Sowing
              Fertiliser
              Operations FertiliserEvents
                2010-01-07  [Fertiliser].Apply(95, Fertiliser.Types.UreaN,10);
                2010-02-08  [Fertiliser].Apply(95, Fertiliser.Types.NH4N,10);
              Irrigation
              Manager AutomaticIrrigation
                allowIrrigation = True
                seasonStart = 14-mar
                seasonEnd = 4-jun
                seasonsAllocation = 10000
                triggerDeficit = 80
                targetDeficit = 100
                returndays = 0
                maximumAmount = 1000
                depthPAWC = 500
                script: same as in Validation.Australia.Narrabri Deficit Experiments.NAR0607.Narrabri deficit experiment 200607.paddock.AutomaticIrrigation
              Operations IrrigationEvents (disabled)
                2010-03-14  ;
                2010-04-03  ;
                2010-04-12  ;
                2010-04-21  ;
                2010-04-29  ;
                2010-05-08  ;
                2010-05-16  ;
                2010-05-25  ;
                2010-06-04  ;
              Manager Harvesting: same as Validation.Australia.Narrabri Deficit Experiments.NAR0607.Narrabri deficit experiment 200607.paddock.Harvesting
              Soil Ayr Loam (Estimated): same as Validation.Australia.Burdekin Planting Date Experiments.BDK09P1.BDK09P1.paddock.Ayr Loam (Estimated)
              SurfaceOrganicMatter: InitialResidueName=maize; InitialResidueType=maize; InitialResidueMass=2000; InitialStandingFraction=0; InitialCPR=0; InitialCNR=33
              Plant Cotton: PlantType=Cotton; IsEnding=false; DaysAfterEnding=0
              Report DailyReport: same as Validation.Australia.MyallVale.MyallVale2006.MyallVale2006Base.paddock.DailyReport
              Report HarvestReport: EventNames=[Cotton].Harvesting
                VariableNames:
                  [Clock].Today
                  [Cotton].Structure.MainStemPrimordiaNo
                  [Cotton].Phenology.NFF
                  [Cotton].Script.FinalTag
        Experiment BDK11P1
          Memo
            Cultivars:

            S24 = Manark

            S70 = Leichhardt

            S74 = Soya791

            =================

            Plant density:

            S24 = 6.3

            S70 = 6.2

            S74 = 6.1

            Average = 6.0
          Factors
            Permutation
              Factor Cv
                Specification=[Sowing].Script.CultivarName = Siokra_24BRF, Sicot_70BRF, Sicot_74BRF
          Simulation BDK11P1
            Clock: Start=2010-11-01; End=2011-08-31
            Summary summaryfile
            Weather: FileName=QLD_BDK2008-12.met
            SoilArbitrator Soil Arbitrator
            MicroClimate: a_interception=0; b_interception=1; c_interception=0; d_interception=0; SoilHeatFluxFraction=0.4; MinimumHeightDiffForNewLayer=0; NightInterceptionFraction=0.5; ReferenceHeight=2
            Zone paddock: Area=1; Slope=0; AspectAngle=0; Altitude=50
              Manager Sowing
                Crop = [Cotton]
                SowDate = 18-dec
                CultivarName = Cotton_Generic
                SowingDepth = 50
                RowSpacing = 750
                Population = 6
                script: same as in Validation.Australia.Narrabri Deficit Experiments.NAR0607.Narrabri deficit experiment 200607.paddock.Sowing
              Fertiliser
              Operations FertiliserEvents
                2010-12-18  [Fertiliser].Apply(95, Fertiliser.Types.UreaN,10);
                2011-02-09  [Fertiliser].Apply(95, Fertiliser.Types.NH4N,10);
                2011-02-28  [Fertiliser].Apply(30, Fertiliser.Types.NO3N,10);
              Irrigation
              Manager AutomaticIrrigation
                allowIrrigation = True
                seasonStart = 21-mar
                seasonEnd = 3-may
                seasonsAllocation = 10000
                triggerDeficit = 80
                targetDeficit = 100
                returndays = 0
                maximumAmount = 1000
                depthPAWC = 500
                script: same as in Validation.Australia.Narrabri Deficit Experiments.NAR0607.Narrabri deficit experiment 200607.paddock.AutomaticIrrigation
              Operations IrrigationEvents (disabled)
                2011-03-21  ;
                2011-04-12  ;
                2011-04-19  ;
                2011-04-26  ;
                2011-05-03  ;
              Manager Harvesting: same as Validation.Australia.Narrabri Deficit Experiments.NAR0607.Narrabri deficit experiment 200607.paddock.Harvesting
              Soil Ayr Loam (Estimated): SoilType=Grey Vertosol; Site=Ayr Queensland; NearestTown=Ayr, QLD  4807; Region=Burdekin; State=Queensland; Country=Australia; NaturalVegetation=Flood Plain; Latitude=-19.576; Longitude=147.405; LocationAccuracy=+/- 20m; DataSource=CSIRO Plant Industry, Approximation Only
                Comments=Based on Myall Vale heavy clay.  Adjusted based on observations by Dr Stephen Yeates (CSIRO Plant Industry)
                Physical: same as Validation.Australia.Burdekin Planting Date Experiments.BDK09P1.BDK09P1.paddock.Ayr Loam (Estimated).Physical
                WaterBalance SoilWater: same as Validation.Australia.Burdekin Planting Date Experiments.BDK09P1.BDK09P1.paddock.Ayr Loam (Estimated).SoilWater
                Organic: same as Validation.Australia.Burdekin Planting Date Experiments.BDK09P1.BDK09P1.paddock.Ayr Loam (Estimated).Organic
                Chemical: same as Validation.Australia.Burdekin Planting Date Experiments.BDK09P1.BDK09P1.paddock.Ayr Loam (Estimated).Chemical
                Nutrient
                Water: Thickness=[150, 100, 100, 250, 200, 200, 300, 200, 200]; RelativeTo=Soybean; FilledFromTop=true
                  InitialValues=[0.279, 0.289, 0.289, 0.251, 0.238, 0.24, 0.29, 0.305, 0.31]
                CERESSoilTemperature Temperature
                Solute NO3: Thickness=[300, 300]; InitialValues=[1, 5.3]; InitialValuesUnits=ppm; WaterTableConcentration=0; D0=0; DepthConstant=0; MaxDepthSoluteAccessible=0; RunoffEffectivenessAtMovingSolute=0; MaxEffectiveRunoff=0
                Solute NH4: Thickness=[300, 300]; InitialValues=[2.6, 1.7]; InitialValuesUnits=ppm; WaterTableConcentration=0; D0=0; DepthConstant=0; MaxDepthSoluteAccessible=0; RunoffEffectivenessAtMovingSolute=0; MaxEffectiveRunoff=0
                Solute Urea: Thickness=[100]; InitialValues=[0]; InitialValuesUnits=kg/ha; WaterTableConcentration=0; D0=0; DepthConstant=0; MaxDepthSoluteAccessible=0; RunoffEffectivenessAtMovingSolute=0; MaxEffectiveRunoff=0
              SurfaceOrganicMatter: InitialResidueName=maize; InitialResidueType=maize; InitialResidueMass=2000; InitialStandingFraction=0; InitialCPR=0; InitialCNR=33
              Plant Cotton: PlantType=Cotton; IsEnding=false; DaysAfterEnding=0
              Report DailyReport: same as Validation.Australia.MyallVale.MyallVale2006.MyallVale2006Base.paddock.DailyReport
              Report HarvestReport: EventNames=[Cotton].Harvesting
                VariableNames:
                  [Clock].Today
                  [Cotton].Structure.MainStemPrimordiaNo
                  [Cotton].Phenology.NFF
                  [Cotton].Script.FinalTag
        Experiment BDK11P2
          Memo
            Cultivars:

            S24 = Manark

            S70 = Leichhardt

            S74 = Soya791

            =================

            Plant density:

            S24 = 5.8

            S70 = 5.9

            S74 = 6.3

            Average = 6.0
          Factors
            Permutation
              Factor Cv
                Specification=[Sowing].Script.CultivarName = Siokra_24BRF, Sicot_70BRF, Sicot_74BRF
          Simulation BDK11P2
            Clock: Start=2010-11-01; End=2011-08-31
            Summary summaryfile
            Weather: FileName=QLD_BDK2008-12.met
            SoilArbitrator Soil Arbitrator
            MicroClimate: a_interception=0; b_interception=1; c_interception=0; d_interception=0; SoilHeatFluxFraction=0.4; MinimumHeightDiffForNewLayer=0; NightInterceptionFraction=0.5; ReferenceHeight=2
            Zone paddock: Area=1; Slope=0; AspectAngle=0; Altitude=50
              Manager Sowing
                Crop = [Cotton]
                SowDate = 7-jan
                CultivarName = Cotton_Generic
                SowingDepth = 50
                RowSpacing = 750
                Population = 6
                script: same as in Validation.Australia.Narrabri Deficit Experiments.NAR0607.Narrabri deficit experiment 200607.paddock.Sowing
              Fertiliser
              Operations FertiliserEvents
                2011-01-07  [Fertiliser].Apply(95, Fertiliser.Types.UreaN,10);
                2011-02-21  [Fertiliser].Apply(95, Fertiliser.Types.NH4N,10);
                2011-03-16  [Fertiliser].Apply(30, Fertiliser.Types.NO3N,10);
              Irrigation
              Manager AutomaticIrrigation
                allowIrrigation = True
                seasonStart = 21-mar
                seasonEnd = 17-may
                seasonsAllocation = 10000
                triggerDeficit = 80
                targetDeficit = 100
                returndays = 0
                maximumAmount = 1000
                depthPAWC = 500
                script: same as in Validation.Australia.Narrabri Deficit Experiments.NAR0607.Narrabri deficit experiment 200607.paddock.AutomaticIrrigation
              Operations IrrigationEvents (disabled)
                2011-03-21  ;
                2011-04-13  ;
                2011-04-19  ;
                2011-04-26  ;
                2011-05-03  ;
                2011-05-10  ;
                2011-05-17  ;
              Manager Harvesting: same as Validation.Australia.Narrabri Deficit Experiments.NAR0607.Narrabri deficit experiment 200607.paddock.Harvesting
              Soil Ayr Loam (Estimated): same as Validation.Australia.Burdekin Planting Date Experiments.BDK11P1.BDK11P1.paddock.Ayr Loam (Estimated)
              SurfaceOrganicMatter: InitialResidueName=maize; InitialResidueType=maize; InitialResidueMass=2000; InitialStandingFraction=0; InitialCPR=0; InitialCNR=33
              Plant Cotton: PlantType=Cotton; IsEnding=false; DaysAfterEnding=0
              Report DailyReport: same as Validation.Australia.MyallVale.MyallVale2006.MyallVale2006Base.paddock.DailyReport
              Report HarvestReport: EventNames=[Cotton].Harvesting
                VariableNames:
                  [Clock].Today
                  [Cotton].Structure.MainStemPrimordiaNo
                  [Cotton].Phenology.NFF
                  [Cotton].Script.FinalTag
        Experiment BDK12P1
          Memo
            Cultivars:

            S24 = Manark

            S70 = Leichhardt

            S74 = Soya791

            =================

            Plant density:

            S24 = 5.8

            S70 = 6.1

            S74 = 6.0

            Average = 6.0
          Factors
            Permutation
              Factor Cv
                Specification=[Sowing].Script.CultivarName = Siokra_24BRF, Sicot_70BRF, Sicot_74BRF
          Simulation BDK12P1
            Clock: Start=2011-11-01; End=2012-08-31
            Summary summaryfile
            Weather: FileName=QLD_BDK2008-12.met
            SoilArbitrator Soil Arbitrator
            MicroClimate: a_interception=0; b_interception=1; c_interception=0; d_interception=0; SoilHeatFluxFraction=0.4; MinimumHeightDiffForNewLayer=0; NightInterceptionFraction=0.5; ReferenceHeight=2
            Zone paddock: Area=1; Slope=0; AspectAngle=0; Altitude=50
              Manager Sowing: same as Validation.Australia.Burdekin Planting Date Experiments.BDK11P1.BDK11P1.paddock.Sowing
              Fertiliser
              Operations FertiliserEvents
                2011-12-18  [Fertiliser].Apply(95, Fertiliser.Types.UreaN,10);
                2012-02-05  [Fertiliser].Apply(95, Fertiliser.Types.NH4N,10);
                2012-02-24  [Fertiliser].Apply(30, Fertiliser.Types.NO3N,10);
              Irrigation
              Manager AutomaticIrrigation: same as Validation.Australia.Burdekin Planting Date Experiments.BDK11P2.BDK11P2.paddock.AutomaticIrrigation
              Operations IrrigationEvents (disabled)
              Manager Harvesting: same as Validation.Australia.Narrabri Deficit Experiments.NAR0607.Narrabri deficit experiment 200607.paddock.Harvesting
              Soil Ayr Loam (Estimated): SoilType=Grey Vertosol; Site=Ayr Queensland; NearestTown=Ayr, QLD  4807; Region=Burdekin; State=Queensland; Country=Australia; NaturalVegetation=Flood Plain; Latitude=-19.576; Longitude=147.405; LocationAccuracy=+/- 20m; DataSource=CSIRO Plant Industry, Approximation Only
                Comments=Based on Myall Vale heavy clay.  Adjusted based on observations by Dr Stephen Yeates (CSIRO Plant Industry)
                Physical: same as Validation.Australia.Burdekin Planting Date Experiments.BDK09P1.BDK09P1.paddock.Ayr Loam (Estimated).Physical
                WaterBalance SoilWater: same as Validation.Australia.Burdekin Planting Date Experiments.BDK09P1.BDK09P1.paddock.Ayr Loam (Estimated).SoilWater
                Organic: same as Validation.Australia.Burdekin Planting Date Experiments.BDK09P1.BDK09P1.paddock.Ayr Loam (Estimated).Organic
                Chemical: same as Validation.Australia.Burdekin Planting Date Experiments.BDK09P1.BDK09P1.paddock.Ayr Loam (Estimated).Chemical
                Nutrient
                Water: Thickness=[150, 100, 100, 250, 200, 200, 300, 200, 200]; RelativeTo=Soybean; FilledFromTop=true
                  InitialValues=[0.279, 0.289, 0.289, 0.251, 0.238, 0.24, 0.29, 0.305, 0.31]
                CERESSoilTemperature Temperature
                Solute NO3: Thickness=[300]; InitialValues=[30]; InitialValuesUnits=ppm; WaterTableConcentration=0; D0=0; DepthConstant=0; MaxDepthSoluteAccessible=0; RunoffEffectivenessAtMovingSolute=0; MaxEffectiveRunoff=0
                Solute NH4: Thickness=[1700]; InitialValues=[0]; InitialValuesUnits=ppm; WaterTableConcentration=0; D0=0; DepthConstant=0; MaxDepthSoluteAccessible=0; RunoffEffectivenessAtMovingSolute=0; MaxEffectiveRunoff=0
                Solute Urea: Thickness=[100]; InitialValues=[0]; InitialValuesUnits=kg/ha; WaterTableConcentration=0; D0=0; DepthConstant=0; MaxDepthSoluteAccessible=0; RunoffEffectivenessAtMovingSolute=0; MaxEffectiveRunoff=0
              SurfaceOrganicMatter: InitialResidueName=maize; InitialResidueType=maize; InitialResidueMass=2000; InitialStandingFraction=0; InitialCPR=0; InitialCNR=33
              Plant Cotton: PlantType=Cotton; IsEnding=false; DaysAfterEnding=0
              Report DailyReport: same as Validation.Australia.MyallVale.MyallVale2006.MyallVale2006Base.paddock.DailyReport
              Report HarvestReport: EventNames=[Cotton].Harvesting
                VariableNames:
                  [Clock].Today
                  [Cotton].Structure.MainStemPrimordiaNo
                  [Cotton].Phenology.NFF
                  [Cotton].Script.FinalTag
        Experiment BDK12P2 (disabled)
          Memo
            Cultivars:

            S24 = Manark

            S70 = Leichhardt

            S74 = Soya791

            =================

            Plant density:

            S24 = 5.8

            S70 = 5.9

            S74 = 6.3

            Average = 6.0
          Factors
            Permutation
              Factor Cv
                Specification=[Sowing].Script.CultivarName = Siokra_24BRF, Sicot_70BRF, Sicot_74BRF
          Simulation BDK12P2
            Clock: Start=2011-11-01; End=2012-09-30
            Summary summaryfile
            Weather: FileName=QLD_BDK2008-12.met
            SoilArbitrator Soil Arbitrator
            MicroClimate: a_interception=0; b_interception=1; c_interception=0; d_interception=0; SoilHeatFluxFraction=0.4; MinimumHeightDiffForNewLayer=0; NightInterceptionFraction=0.5; ReferenceHeight=2
            Zone paddock: Area=1; Slope=0; AspectAngle=0; Altitude=50
              Manager Sowing
                Crop = [Cotton]
                SowDate = 4-jan
                CultivarName = Cotton_Generic
                SowingDepth = 50
                RowSpacing = 750
                Population = 6
                script: same as in Validation.Australia.Narrabri Deficit Experiments.NAR0607.Narrabri deficit experiment 200607.paddock.Sowing
              Fertiliser
              Operations FertiliserEvents
                2012-01-04  [Fertiliser].Apply(95, Fertiliser.Types.UreaN,10);
                2012-02-17  [Fertiliser].Apply(95, Fertiliser.Types.NH4N,10);
                2012-03-10  [Fertiliser].Apply(30, Fertiliser.Types.NO3N,10);
              Irrigation
              Manager AutomaticIrrigation
                allowIrrigation = True
                seasonStart = 21-mar
                seasonEnd = 17-may
                seasonsAllocation = 10000
                triggerDeficit = 80
                targetDeficit = 100
                returndays = 0
                maximumAmount = 1000
                depthPAWC = 500
                script: same as in Validation.Australia.Narrabri Deficit Experiments.NAR0607.Narrabri deficit experiment 200607.paddock.AutomaticIrrigation
              Operations IrrigationEvents
              Manager Harvesting: same as Validation.Australia.Burdekin Planting Date Experiments.BDK08P1.BDK08P1.paddock.Harvesting
              Soil Ayr Loam (Estimated): SoilType=Grey Vertosol; Site=Ayr Queensland; NearestTown=Ayr, QLD  4807; Region=Burdekin; State=Queensland; Country=Australia; NaturalVegetation=Flood Plain; Latitude=-19.576; Longitude=147.405; LocationAccuracy=+/- 20m; DataSource=CSIRO Plant Industry, Approximation Only
                Comments=Based on Myall Vale heavy clay.  Adjusted based on observations by Dr Stephen Yeates (CSIRO Plant Industry)
                Physical: same as Validation.Australia.Burdekin Planting Date Experiments.BDK08P1.BDK08P1.paddock.Ayr Loam (Estimated).Physical
                WaterBalance SoilWater: same as Validation.Australia.Burdekin Planting Date Experiments.BDK08P1.BDK08P1.paddock.Ayr Loam (Estimated).SoilWater
                Organic: same as Validation.Australia.Burdekin Planting Date Experiments.BDK08P1.BDK08P1.paddock.Ayr Loam (Estimated).Organic
                Chemical: same as Validation.Australia.Burdekin Planting Date Experiments.BDK08P1.BDK08P1.paddock.Ayr Loam (Estimated).Chemical
                Nutrient
                Water: Thickness=[150, 100, 100, 250, 200, 200, 300, 200, 200]; RelativeTo=Soybean; FilledFromTop=true
                  InitialValues=[0.279, 0.289, 0.289, 0.251, 0.238, 0.24, 0.29, 0.305, 0.31]
                CERESSoilTemperature Temperature
                Solute NO3: Thickness=[300]; InitialValues=[30]; InitialValuesUnits=ppm; WaterTableConcentration=0; D0=0; DepthConstant=0; MaxDepthSoluteAccessible=0; RunoffEffectivenessAtMovingSolute=0; MaxEffectiveRunoff=0
                Solute NH4: Thickness=[1700]; InitialValues=[0]; InitialValuesUnits=ppm; WaterTableConcentration=0; D0=0; DepthConstant=0; MaxDepthSoluteAccessible=0; RunoffEffectivenessAtMovingSolute=0; MaxEffectiveRunoff=0
                Solute Urea: Thickness=[100]; InitialValues=[0]; InitialValuesUnits=kg/ha; WaterTableConcentration=0; D0=0; DepthConstant=0; MaxDepthSoluteAccessible=0; RunoffEffectivenessAtMovingSolute=0; MaxEffectiveRunoff=0
              SurfaceOrganicMatter: InitialResidueName=maize; InitialResidueType=maize; InitialResidueMass=2000; InitialStandingFraction=0; InitialCPR=0; InitialCNR=33
              Plant Cotton: PlantType=Cotton; IsEnding=false; DaysAfterEnding=0
              Report DailyReport: same as Validation.Australia.Burdekin.Burdekin2008.Burdekin2008Base.paddock.DailyReport
              Report HarvestReport: EventNames=[Cotton].Harvesting
                VariableNames:
                  [Clock].Today
                  [Cotton].Structure.MainStemPrimordiaNo
                  [Cotton].Phenology.NFF
                  [Cotton].Script.FinalTag
      Folder Nitrogen Rate Experiments
        Memo Tim Weaver Nitrogen Experiments
          * Pre-sowing soil test data available (initial NO3, NH4, Org. C). Tim Weaver had them collected and needs to find them

          * Gin turnout data from the 2021 trial not available yet - results not yet received from the lab

          * There is no phenology data available from the trial since this was not collected
        Experiment TW20
          Factors
            Permutation
              Factor Cv
                Specification=[Sowing].Script.CultivarName = Sicala_V2, Sicot_714B3F, Sicot_746B3F
              Factor N
                CompositeFactor 0
                CompositeFactor 100: Specifications=[FertiliserEvents]
                  Operations FertiliserEvents
                    2019-09-27  [Fertiliser].Apply(100, Fertiliser.Types.UreaN,10);
                CompositeFactor 200: Specifications=[FertiliserEvents]
                  Operations FertiliserEvents
                    2019-09-27  [Fertiliser].Apply(100, Fertiliser.Types.UreaN,10);
                    2019-12-17  [Fertiliser].Apply(100, Fertiliser.Types.UreaN,10);
                CompositeFactor 300: Specifications=[FertiliserEvents]
                  Operations FertiliserEvents
                    2019-09-27  [Fertiliser].Apply(100, Fertiliser.Types.UreaN,10);
                    2019-12-17  [Fertiliser].Apply(200, Fertiliser.Types.UreaN,10);
          Simulation Nitrogen rate trial ACRI 2019_20
            Clock: Start=2019-11-01; End=2020-05-30
            Summary summaryfile
            Weather: FileName=WeeWaaAgResStn.met
            SoilArbitrator Soil Arbitrator
            MicroClimate: a_interception=0; b_interception=1; c_interception=0; d_interception=0; SoilHeatFluxFraction=0.4; MinimumHeightDiffForNewLayer=0; NightInterceptionFraction=0.5; ReferenceHeight=2
            Zone paddock: Area=1; Slope=0; AspectAngle=0; Altitude=50
              Manager Sowing
                Crop = [Cotton]
                SowDate = 4-nov
                CultivarName = Cotton_Generic
                SowingDepth = 30
                RowSpacing = 1000
                Population = 7
                script: same as in Validation.Australia.Narrabri Deficit Experiments.NAR0607.Narrabri deficit experiment 200607.paddock.Sowing
              Fertiliser
              Operations FertiliserEvents
                2019-09-27  [Fertiliser].Apply(100, Fertiliser.Types.UreaN,10);
                2019-12-17  [Fertiliser].Apply(100, Fertiliser.Types.UreaN,10);
                2019-12-17  [Fertiliser].Apply(200, Fertiliser.Types.UreaN,10);
              Irrigation
              Manager AutomaticIrrigation
                triggerDeficit = 80
                allowIrrigation = True
                seasonStart = 1-nov
                seasonEnd = 30-may
                seasonsAllocation = 10000
                targetDeficit = 100
                returndays = 0
                maximumAmount = 1000
                depthPAWC = 500
                script: same as in Validation.Australia.Narrabri Deficit Experiments.NAR0607.Narrabri deficit experiment 200607.paddock.AutomaticIrrigation
              Manager Harvesting: same as Validation.Australia.Narrabri Deficit Experiments.NAR0607.Narrabri deficit experiment 200607.paddock.Harvesting
              Soil Grey Vertosol (Myall Vale No097): ASCOrder=Vertosol; ASCSubOrder=Grey; SoilType=Clay; Site=Myall Vale; NearestTown=Narrabri, NSW 2390; Region=North West Slopes and Plains; State=New South Wales; Country=Australia; NaturalVegetation=Grasslands; ApsoilNumber=97; Latitude=-30.2056; Longitude=149.593; LocationAccuracy=+/- 20m; YearOfSampling=0; DataSource=CSIRO Plant Industry, Myall Vale (D Richards); Comments=Clay -
                Physical: same as Validation.Australia.Narrabri Deficit Experiments.NAR0607.Narrabri deficit experiment 200607.paddock.Grey Vertosol (Myall Vale No097).Physical
                WaterBalance SoilWater: same as Validation.Australia.Narrabri Deficit Experiments.NAR0607.Narrabri deficit experiment 200607.paddock.Grey Vertosol (Myall Vale No097).SoilWater
                Organic: same as Validation.Australia.Narrabri Deficit Experiments.NAR0607.Narrabri deficit experiment 200607.paddock.Grey Vertosol (Myall Vale No097).Organic
                Chemical: same as Validation.Australia.Narrabri Deficit Experiments.NAR0607.Narrabri deficit experiment 200607.paddock.Grey Vertosol (Myall Vale No097).Chemical
                Nutrient
                Water: Thickness=[150, 150, 300, 300, 300, 300, 300]; InitialValues=[0.43, 0.44, 0.347, 0.22, 0.22, 0.22, 0.22]; RelativeTo=LL15; FilledFromTop=true
                CERESSoilTemperature
                Solute NO3: Thickness=[150, 150, 300, 300, 300, 300, 300]; InitialValues=[1, 1, 1, 1, 1, 1, 1]; InitialValuesUnits=ppm; WaterTableConcentration=0; D0=0; DepthConstant=0; MaxDepthSoluteAccessible=0; RunoffEffectivenessAtMovingSolute=0; MaxEffectiveRunoff=0
                Solute NH4: Thickness=[150, 150, 300, 300, 300, 300, 300]; InitialValues=[0.1, 0.1, 0.1, 0.1, 0.1, 0.1, 0.1]; InitialValuesUnits=ppm; WaterTableConcentration=0; D0=0; DepthConstant=0; MaxDepthSoluteAccessible=0; RunoffEffectivenessAtMovingSolute=0; MaxEffectiveRunoff=0
                Solute Urea: same as Validation.Australia.Narrabri Deficit Experiments.NAR0607.Narrabri deficit experiment 200607.paddock.Grey Vertosol (Myall Vale No097).NH4
              SurfaceOrganicMatter: InitialResidueName=nativepasture; InitialResidueType=nativepasture; InitialResidueMass=3833; InitialStandingFraction=0.3; InitialCPR=0; InitialCNR=34
              Plant Cotton: PlantType=Cotton; IsEnding=false; DaysAfterEnding=0
              Report DailyReport: same as Validation.Australia.MyallVale.MyallVale2006.MyallVale2006Base.paddock.DailyReport
              Report HarvestReport: EventNames=[Cotton].Harvesting
                VariableNames:
                  [Clock].Today
                  [Cotton].Structure.MainStemPrimordiaNo
                  [Cotton].Phenology.NFF
                  [Cotton].Script.FinalTag
      Folder Northern Territory Farm Monitoring
        Memo Northern Territory Sites
          Reduce N rates (Urea) for NT dryland sites - model does not take into account volatilisation losses
        Experiment KRS19RF
          Factors
            Permutation
              Factor RS: Specification=[Sowing].Script.RowSpacing = 1000, 2000, 3000
              Factor Cv: Specification=[Sowing].Script.CultivarName = Sicot_714B3F, Sicot_748B3F
          Simulation Katherine Research Station 2019 Rainfed Rowspacing
            Memo
              Planting density (plants/m2):

              714/1000 - 9.5;
              714/2000 - 10.0;
              714/3000 - 8.5;
              748/1000 - 12.0;
              748/2000 - 8.5;
              748/3000 - 9.5

              Average: 9.7

              Cultivars:

              714 - Buchanan;
              748 - Davis
            Clock: Start=2019-01-01; End=2019-08-31
            Summary summaryfile
            Weather: FileName=NT_KRS2019RF.met
            SoilArbitrator Soil Arbitrator
            MicroClimate: a_interception=0; b_interception=1; c_interception=0; d_interception=0; SoilHeatFluxFraction=0.4; MinimumHeightDiffForNewLayer=0; NightInterceptionFraction=0.5; ReferenceHeight=2
            Zone paddock: Area=1; Slope=0; AspectAngle=0; Altitude=50
              Manager Sowing
                Crop = [Cotton]
                SowDate = 12-jan
                CultivarName = Cotton_Generic
                SowingDepth = 40
                RowSpacing = 500
                Population = 9.7
                script: same as in Validation.Australia.Narrabri Deficit Experiments.NAR0607.Narrabri deficit experiment 200607.paddock.Sowing
              Fertiliser
              Operations FertiliserEvents
                2019-01-12  [Fertiliser].Apply(44, Fertiliser.Types.NH4NO3N,10);
                2019-02-09  [Fertiliser].Apply(46, Fertiliser.Types.UreaN,10);
              Irrigation
              Manager Harvesting: same as Validation.Australia.Narrabri Deficit Experiments.NAR0607.Narrabri deficit experiment 200607.paddock.Harvesting
              Soil Tippera clay loam: SoilType=Clay Loam, Red Earth, Alfisol - Katherine (PAWC = 83mm); LocalName=Tippera; NearestTown=Katherine; State=NT; YearOfSampling=0; DataSource=Perry Poulton from FS48 W2 and FS48.N2 files
                Physical
                  Thickness  BD    AirDry  LL15   DUL   SAT
                  50         1.56  0.064   0.186  0.26  0.38
                  100        1.56  0.099   0.196  0.28  0.38
                  150        1.52  0.146   0.215  0.3   0.371
                  300        1.46  0.196   0.231  0.3   0.381
                  300        1.42  0.22    0.237  0.31  0.392
                  300        1.46  0.218   0.282  0.31  0.388
                  300        1.5   0.231   0.301  0.31  0.377
                  300        1.53  0.236   0.306  0.32  0.377
                  SoilCrop CottonSoil: LL=[0.186, 0.196, 0.215, 0.231, 0.237, 0.282, 0.301, 0.306]; KL=[0.07, 0.07, 0.07, 0.07, 0.07, 0.07, 0.07, 0.04]; XF=[1, 1, 1, 1, 1, 1, 1, 0]
                WaterBalance SoilWater: SummerDate=1-Oct; SummerU=3.5; SummerCona=6; WinterDate=1-Apr; WinterU=3; WinterCona=4; DiffusConst=250; DiffusSlope=22; Salb=0.2; CN2Bare=85; CNRed=20; CNCov=0.8; PSIDul=-100; Thickness=[50, 100, 150, 300, 300, 300, 300, 300]; SWCON=[0.5, 0.5, 0.4, 0.4, 0.4, 0.3, 0.3, 0.3]
                Organic: FOMCNRatio=40; CarbonUnits=Total
                  Thickness  Carbon  SoilCNRatio  FBiom  FInert  FOM
                  50         2.366   12.5         0.05   0.39    290.823
                  100        1.3     12.5         0.02   0.47    246.176
                  150        0.767   12.5         0.015  0.52    191.722
                  300        0.442   12.5         0.01   0.62    116.285
                  300        0.338   12.5         0.01   0.74    70.531
                  300        0.325   12.5         0.01   0.83    42.779
                  300        0.247   12.5         0.01   0.93    25.947
                  300        0.273   12.5         0.01   0.94    15.738
                CERESSoilTemperature Temperature
                Chemical: Thickness=[50, 100, 150, 300, 300, 300, 300, 300]; PH=[6.5, 6.5, 6.2, 6.4, 6.5, 6.5, 6.6, 6.6]; PHUnits=Water
                  PH source: Unknown source or quality of data (layer 1, 2, 3, 4, 5)
                Nutrient
                Water: Thickness=[50, 100, 150, 300, 300, 300, 300, 300]; InitialValues=[0.186, 0.196, 0.215, 0.231, 0.237, 0.282, 0.301, 0.306]; RelativeTo=LL15; FilledFromTop=true
                Solute NO3: Thickness=[1800]; InitialValues=[3]; InitialValuesUnits=ppm; WaterTableConcentration=0; D0=0; DepthConstant=0; MaxDepthSoluteAccessible=0; RunoffEffectivenessAtMovingSolute=0; MaxEffectiveRunoff=0
                Solute NH4: Thickness=[1800]; InitialValues=[1]; InitialValuesUnits=ppm; WaterTableConcentration=0; D0=0; DepthConstant=0; MaxDepthSoluteAccessible=0; RunoffEffectivenessAtMovingSolute=0; MaxEffectiveRunoff=0
                Solute Urea: Thickness=[1800]; InitialValues=[0]; InitialValuesUnits=ppm; WaterTableConcentration=0; D0=0; DepthConstant=0; MaxDepthSoluteAccessible=0; RunoffEffectivenessAtMovingSolute=0; MaxEffectiveRunoff=0
              SurfaceOrganicMatter: InitialResidueName=Sorghum; InitialResidueType=sorghum; InitialResidueMass=0; InitialStandingFraction=0; InitialCPR=0; InitialCNR=0
              Plant Cotton: PlantType=Cotton; IsEnding=false; DaysAfterEnding=0
              Report DailyReport: same as Validation.Australia.MyallVale.MyallVale2006.MyallVale2006Base.paddock.DailyReport
              Report HarvestReport: EventNames=[Cotton].Harvesting
                VariableNames:
                  [Clock].Today
                  [Cotton].Structure.MainStemPrimordiaNo
                  [Cotton].Phenology.NFF
                  [Cotton].Script.FinalTag
        Experiment KRS19IR
          Factors
            Permutation
              Factor Cv
                Specification=[Sowing].Script.CultivarName = Sicot_707B3F, Sicot_714B3F, Sicot_746B3F, Sicot_748B3F
          Simulation Katherine Research Station 2019 Irrigation
            Memo
              Irrigation added to rainfall in weather file

              Planting density (plants/m2):

              707 - 10.6;

              714 - 10.4;

              746 - 10.2;

              748 - 10.4

              Average: 10.4

              Cultivars:

              707 - Bowyer;

              714 - Buchanan;

              746 - Cowrie;

              748 - Davis
            Clock: Start=2019-02-01; End=2019-08-31
            Summary summaryfile
            Weather: FileName=NT_KRS2019Ir3.met
            SoilArbitrator Soil Arbitrator
            MicroClimate: a_interception=0; b_interception=1; c_interception=0; d_interception=0; SoilHeatFluxFraction=0.4; MinimumHeightDiffForNewLayer=0; NightInterceptionFraction=0.5; ReferenceHeight=2
            Zone paddock: Area=1; Slope=0; AspectAngle=0; Altitude=50
              Manager Sowing
                Crop = [Cotton]
                SowDate = 15-feb
                CultivarName = Cotton_Generic
                SowingDepth = 20
                RowSpacing = 1000
                Population = 10.4
                script: same as in Validation.Australia.Narrabri Deficit Experiments.NAR0607.Narrabri deficit experiment 200607.paddock.Sowing
              Fertiliser
              Operations FertiliserEvents
                2019-02-15  [Fertiliser].Apply(44, Fertiliser.Types.NH4NO3N,10);
                2019-03-08  [Fertiliser].Apply(10, Fertiliser.Types.NH4NO3N,10);
                2019-03-08  [Fertiliser].Apply(75.9, Fertiliser.Types.UreaN,10);
                2019-03-14  [Fertiliser].Apply(43.7, Fertiliser.Types.UreaN,10);
              Irrigation
              Manager Harvesting: same as Validation.Australia.Narrabri Deficit Experiments.NAR0607.Narrabri deficit experiment 200607.paddock.Harvesting
              Soil Tippera clay loam: same as Validation.Australia.Northern Territory Farm Monitoring.KRS19RF.Katherine Research Station 2019 Rainfed Rowspacing.paddock.Tippera clay loam
              SurfaceOrganicMatter: InitialResidueName=Oats; InitialResidueType=oats; InitialResidueMass=0; InitialStandingFraction=0; InitialCPR=0; InitialCNR=0
              Plant Cotton: PlantType=Cotton; IsEnding=false; DaysAfterEnding=0
              Report DailyReport: same as Validation.Australia.MyallVale.MyallVale2006.MyallVale2006Base.paddock.DailyReport
              Report HarvestReport: EventNames=[Cotton].Harvesting
                VariableNames:
                  [Clock].Today
                  [Cotton].Structure.MainStemPrimordiaNo
                  [Cotton].Phenology.NFF
                  [Cotton].Script.FinalTag
        Simulation HRF20
          Clock: Start=2019-12-01; End=2020-08-16
          Summary summaryfile
          Weather: FileName=HD 2020.met
          SoilArbitrator Soil Arbitrator
          MicroClimate: a_interception=0; b_interception=1; c_interception=0; d_interception=0; SoilHeatFluxFraction=0.4; MinimumHeightDiffForNewLayer=0; NightInterceptionFraction=0.5; ReferenceHeight=2
          Zone paddock: Area=1; Slope=0; AspectAngle=0; Altitude=50
            Manager Sowing
              Crop = [Cotton]
              SowDate = 9-jan
              CultivarName = Sicot_746B3F
              SowingDepth = 40
              RowSpacing = 1000
              Population = 8.25
              script: same as in Validation.Australia.Narrabri Deficit Experiments.NAR0607.Narrabri deficit experiment 200607.paddock.Sowing
            Fertiliser
            Operations FertiliserEvents
              2019-12-23  [Fertiliser].Apply(1.24, Fertiliser.Types.UreaN,10);
              2020-01-25  [Fertiliser].Apply(32.2, Fertiliser.Types.UreaN,10);
              2019-02-18  [Fertiliser].Apply(22.5, Fertiliser.Types.NH4NO3N,10);
              2019-03-03  [Fertiliser].Apply(33.8, Fertiliser.Types.UreaN,10);
            Irrigation
            Manager Harvesting: same as Validation.Australia.Narrabri Deficit Experiments.NAR0607.Narrabri deficit experiment 200607.paddock.Harvesting
            Soil Oollo_Howie_2020_187mm: SoilType=Sandy Loam; LocalName=HD20; Site=Chris Howie; NearestTown=Douglas Daly; Region=Douglas Daly; State=NT; Country=Australia; Latitude=0; Longitude=0; LocationAccuracy=Regional Soils; YearOfSampling=0; DataSource=Ian Bigs & Nick Hartly
              Comments=Modified from Tonks Camp Sandly Loam by S Yeates using local data
              Physical
                Thickness  BD    AirDry  LL15   DUL    SAT
                150        1.42  0.009   0.031  0.157  0.434
                150        1.71  0.011   0.047  0.177  0.35
                300        1.56  0.03    0.061  0.138  0.381
                300        1.6   0.027   0.06   0.151  0.368
                300        1.56  0.026   0.053  0.159  0.38
                600        1.56  0.055   0.055  0.159  0.38
                400        1.67  0.054   0.054  0.149  0.339
                300        1.67  0.054   0.054  0.149  0.339
                SoilCrop CottonSoil: LL=[0.091, 0.081, 0.081, 0.071, 0.053, 0.055, 0.08, 0.147]; KL=[0.06, 0.06, 0.04, 0.04, 0.02, 0.02, 0.01, 0.01]; XF=[1, 1, 1, 1, 1, 1, 1, 1]
              WaterBalance SoilWater: SummerDate=1-Sep; SummerU=6; SummerCona=3.5; WinterDate=1-jun; WinterU=4; WinterCona=3; DiffusConst=88; DiffusSlope=35.4; Salb=0.13; CN2Bare=80; CNRed=20; CNCov=0.8; PSIDul=-100; Thickness=[150, 150, 300, 300, 300, 300, 300]; SWCON=[0.9, 0.7, 0.7, 0.5, 0.4, 0.4, 0.4]
              Organic: FOMCNRatio=40; CarbonUnits=Total
                Thickness  Carbon  SoilCNRatio  FBiom  FInert  FOM
                150        0.41    13           0.04   0.3     347.129
                150        0.27    13           0.03   0.3     270.344
                300        0.15    13           0.02   0.3     163.972
                300        0.1     13           0.02   0.4     99.454
                300        0.1     13           0.02   0.6     60.322
                300        0.1     13           0.01   0.9     36.587
                300        0.1     13           0.01   1       22.191
              CERESSoilTemperature Temperature
              Chemical: Thickness=[150, 150, 300, 300, 300, 300, 300, 300, 300, 300, 300]; PH=[7.14, 6.5, 7.11, 7.45, 7.63, 7.76, 7.83, -, -, -, -]; PHUnits=Water
                PH source: Unknown source or quality of data (layer 1, 2, 3, 4, 5, 6, 7)
              Nutrient
              Water: Thickness=[150, 150, 300, 300, 300, 600, 400, 300]; InitialValues=[0.157, 0.177, 0.099, 0.06, 0.053, 0.055, 0.054, 0.054]; RelativeTo=LL15; FilledFromTop=true
              Solute NO3: Thickness=[1800]; InitialValues=[3]; InitialValuesUnits=ppm; WaterTableConcentration=0; D0=0; DepthConstant=0; MaxDepthSoluteAccessible=0; RunoffEffectivenessAtMovingSolute=0; MaxEffectiveRunoff=0
              Solute NH4: Thickness=[1800]; InitialValues=[1]; InitialValuesUnits=ppm; WaterTableConcentration=0; D0=0; DepthConstant=0; MaxDepthSoluteAccessible=0; RunoffEffectivenessAtMovingSolute=0; MaxEffectiveRunoff=0
              Solute Urea: Thickness=[1800]; InitialValues=[0]; InitialValuesUnits=ppm; WaterTableConcentration=0; D0=0; DepthConstant=0; MaxDepthSoluteAccessible=0; RunoffEffectivenessAtMovingSolute=0; MaxEffectiveRunoff=0
            SurfaceOrganicMatter: InitialResidueName=sorghum; InitialResidueType=sorghum; InitialResidueMass=7327; InitialStandingFraction=0.6; InitialCPR=0; InitialCNR=45.3
            Plant Cotton: PlantType=Cotton; IsEnding=false; DaysAfterEnding=0
            Report DailyReport: same as Validation.Australia.MyallVale.MyallVale2006.MyallVale2006Base.paddock.DailyReport
            Report HarvestReport: EventNames=[Cotton].Harvesting
              VariableNames:
                [Clock].Today
                [Cotton].Structure.MainStemPrimordiaNo
                [Cotton].Phenology.NFF
                [Cotton].Script.FinalTag
        Simulation MIR20
          Memo
            Irrigation added to rainfall in weather file
          Clock: Start=2020-02-01; End=2020-08-16
          Summary summaryfile
          Weather: FileName=MI 2020.met
          SoilArbitrator Soil Arbitrator
          MicroClimate: a_interception=0; b_interception=1; c_interception=0; d_interception=0; SoilHeatFluxFraction=0.4; MinimumHeightDiffForNewLayer=0; NightInterceptionFraction=0.5; ReferenceHeight=2
          Zone paddock: Area=1; Slope=0; AspectAngle=0; Altitude=50
            Manager Sowing
              Crop = [Cotton]
              SowDate = 6-feb
              CultivarName = Sicot_746B3F
              SowingDepth = 40
              RowSpacing = 1000
              Population = 10.5
              script: same as in Validation.Australia.Narrabri Deficit Experiments.NAR0607.Narrabri deficit experiment 200607.paddock.Sowing
            Fertiliser
            Operations FertiliserEvents
              2020-02-05  [Fertiliser].Apply(1.3, Fertiliser.Types.UreaN,10);
              2020-02-19  [Fertiliser].Apply(41.3, Fertiliser.Types.UreaN,10);
              2020-03-06  [Fertiliser].Apply(40.5, Fertiliser.Types.UreaN,10);
              2020-03-21  [Fertiliser].Apply(40.5, Fertiliser.Types.UreaN,10);
            Irrigation
            Manager Harvesting: same as Validation.Australia.Narrabri Deficit Experiments.NAR0607.Narrabri deficit experiment 200607.paddock.Harvesting
            Soil Oollo_Mcbean_2020_129mm_claysat_60cm: SoilType=Sandy Loam; Site=Sam Mcbean; NearestTown=Douglas Daly; Region=Douglas Daly; State=NT; Country=Australia; Latitude=0; Longitude=0; LocationAccuracy=Regional Soils; DataSource=Ian Bigs & Nick Hartly
              Comments=Modified from Tonks Camp Sandly Loam by S Yeates using local data
              Physical
                Thickness  BD    AirDry  LL15   DUL    SAT
                150        1.42  0.009   0.031  0.157  0.434
                150        1.71  0.011   0.047  0.177  0.35
                300        1.56  0.03    0.061  0.138  0.381
                300        1.6   0.027   0.06   0.151  0.368
                300        1.56  0.026   0.053  0.159  0.38
                600        1.5   0.266   0.267  0.31   0.377
                400        1.5   0.282   0.295  0.31   0.377
                300        1.53  0.282   0.32   0.32   0.377
                SoilCrop CottonSoil: LL=[0.091, 0.081, 0.081, 0.071, 0.053, 0.267, 0.295, 0.32]; KL=[0.06, 0.06, 0.04, 0.04, 0.02, 0.02, 0.01, 0.01]; XF=[1, 1, 1, 1, 1, 1, 1, 1]
              WaterBalance SoilWater: same as Validation.Australia.Northern Territory Farm Monitoring.HRF20.paddock.Oollo_Howie_2020_187mm.SoilWater
              Organic: FOMCNRatio=40; CarbonUnits=Total
                Thickness  Carbon  SoilCNRatio  FBiom  FInert  FOM
                150        0.51    13           0.04   0.3     347.129
                150        0.29    13           0.03   0.3     270.344
                300        0.15    13           0.02   0.3     163.972
                300        0.1     13           0.02   0.4     99.454
                300        0.1     13           0.02   0.6     60.322
                300        0.1     13           0.01   0.9     36.587
                300        0.1     13           0.01   1       22.191
              CERESSoilTemperature Temperature
              Chemical: Thickness=[150, 150, 300, 300, 300, 300, 300]; PH=[7.14, 6.5, 7.11, 7.45, 7.63, 7.76, 7.83]; PHUnits=Water
                PH source: Unknown source or quality of data
              Nutrient
              Water: Thickness=[150, 150, 300, 300, 300, 600, 400, 300]; InitialValues=[0.031, 0.047, 0.061, 0.06, 0.053, 0.267, 0.295, 0.32]; RelativeTo=LL15; FilledFromTop=true
              Solute NO3: Thickness=[150, 150, 300, 300, 300, 300]; InitialValues=[3.75, 6.125, 6.188, 3, 2.188, 1.5]; InitialValuesUnits=ppm; WaterTableConcentration=0; D0=0; DepthConstant=0; MaxDepthSoluteAccessible=0; RunoffEffectivenessAtMovingSolute=0; MaxEffectiveRunoff=0
              Solute NH4: Thickness=[150, 150, 300, 300, 300, 300]; InitialValues=[5.375, 6.625, 5.75, 6.125, 5.375, 5.875]; InitialValuesUnits=ppm; WaterTableConcentration=0; D0=0; DepthConstant=0; MaxDepthSoluteAccessible=0; RunoffEffectivenessAtMovingSolute=0; MaxEffectiveRunoff=0
              Solute Urea: Thickness=[150, 150, 300, 300, 300, 300]; InitialValues=[0, 0, 0, 0, 0, 0]; InitialValuesUnits=kg/ha; WaterTableConcentration=0; D0=0; DepthConstant=0; MaxDepthSoluteAccessible=0; RunoffEffectivenessAtMovingSolute=0; MaxEffectiveRunoff=0
            SurfaceOrganicMatter: InitialResidueName=Sorghum; InitialResidueType=sorghum; InitialResidueMass=11345; InitialStandingFraction=0.6; InitialCPR=0; InitialCNR=43
            Plant Cotton: PlantType=Cotton; IsEnding=false; DaysAfterEnding=0
            Report DailyReport: same as Validation.Australia.MyallVale.MyallVale2006.MyallVale2006Base.paddock.DailyReport
            Report HarvestReport: EventNames=[Cotton].Harvesting
              VariableNames:
                [Clock].Today
                [Cotton].Structure.MainStemPrimordiaNo
                [Cotton].Phenology.NFF
                [Cotton].Script.FinalTag
          Folder Soil nitrogen
        Simulation MRF21 (disabled)
          Clock: Start=2020-12-20; End=2021-06-30
          Summary summaryfile
          Weather: FileName=NT_MD2021.met
          SoilArbitrator Soil Arbitrator
          MicroClimate: a_interception=0; b_interception=1; c_interception=0; d_interception=0; SoilHeatFluxFraction=0.4; MinimumHeightDiffForNewLayer=0; NightInterceptionFraction=0.5; ReferenceHeight=2
          Zone paddock: Area=1; Slope=0; AspectAngle=0; Altitude=50
            Manager Sowing
              Crop = [Cotton]
              SowDate = 24-dec
              CultivarName = Sicot_748B3F
              SowingDepth = 20
              RowSpacing = 1000
              Population = 7
              script: same as in Validation.Australia.Narrabri Deficit Experiments.NAR0607.Narrabri deficit experiment 200607.paddock.Sowing
            Fertiliser
            Operations FertiliserEvents
              2020-12-17  [Fertiliser].Apply(21, Fertiliser.Types.UreaN,10);
              2020-12-31  [Fertiliser].Apply(42, Fertiliser.Types.UreaN,10);
              2021-02-02  [Fertiliser].Apply(33, Fertiliser.Types.UreaN,10);
            Irrigation
            Manager Harvesting: same as Validation.Australia.Burdekin Planting Date Experiments.BDK08P1.BDK08P1.paddock.Harvesting
            Soil Tindall McBean 2021: SoilType=Haplic Mesotrophic Red Dermosol; LocalName=Tindall; Site=McBean - Billabong; NearestTown=Pine Creek; Region=Daly Basin; State=Northern Territory; Country=Australia; Latitude=-13.85; Longitude=131.2; YearOfSampling=2021; DataSource=CSIRO/NTDPI
              Physical
                Thickness  BD    AirDry  LL15  DUL   SAT
                300        1.59  0.05    0.08  0.18  0.35
                300        1.68  0.12    0.15  0.26  0.31
                300        1.63  0.14    0.15  0.31  0.36
                300        1.62  0.15    0.15  0.31  0.36
                300        1.56  0.15    0.15  0.3   0.36
                300        1.62  0.15    0.15  0.31  0.36
                300        1.64  0.15    0.15  0.3   0.35
                300        1.62  0.15    0.15  0.31  0.36
                300        1.59  0.15    0.15  0.29  0.34
                300        1.65  0.15    0.15  0.3   0.35
                DUL source: Field measured and checked for sensibility
                SoilCrop CottonSoil: LL=[0.08, 0.15, 0.18, 0.2, 0.19, 0.19, 0.21, 0.21, 0.23, 0.24]; KL=[0.1, 0.1, 0.1, 0.09, 0.07, 0.05, 0.03, 0.03, 0.03, 0.03]; XF=[1, 1, 1, 1, 1, 1, 1, 1, 1, 1]
              WaterBalance SoilWater: SummerDate=1-Sep; SummerU=6; SummerCona=3.5; WinterDate=1-Jun; WinterU=4; WinterCona=3; DiffusConst=88; DiffusSlope=35.4; Salb=0.13; CN2Bare=80; CNRed=20; CNCov=0.8; PSIDul=-100; Thickness=[300, 300, 300, 300, 300, 300, 300, 300, 300, 300]; SWCON=[1, 0.8, 0.6, 0.4, 0.4, 0.4, 0.4, 0.4, 0.4, 0.4]
              Organic: FOMCNRatio=40; CarbonUnits=Total
                Thickness  Carbon  SoilCNRatio  FBiom  FInert  FOM
                300        0.35    12           0.035  0.3     272.762
                300        0.19    12           0.02   0.3     202.067
                300        0.12    12           0.02   0.4     149.695
                300        0.1     12           0.02   0.6     110.897
                300        0.1     12           0.01   0.9     82.154
                300        0.1     12           0.01   0.95    60.861
                300        0.1     12           0.01   0.95    45.087
                300        0.1     12           0.01   0.95    33.401
                300        0.1     12           0.01   0.95    24.744
                300        0.1     12           0.01   0.95    18.331
              CERESSoilTemperature Temperature
              Chemical: Thickness=[300, 300, 300, 300]; PH=[6.244, 6.026, 6.655, 6.612]; PHUnits=Water
                PH source: Measured
              Nutrient
              Water: Thickness=[300, 300, 300, 300, 300, 300, 300, 300, 300, 300]; RelativeTo=LL15; FilledFromTop=true
                InitialValues=[0.18, 0.26, 0.31, 0.212, 0.15, 0.15, 0.15, 0.15, 0.15, 0.15]
              Solute NO3: Thickness=[1800]; InitialValues=[3]; InitialValuesUnits=ppm; WaterTableConcentration=0; D0=0; DepthConstant=0; MaxDepthSoluteAccessible=0; RunoffEffectivenessAtMovingSolute=0; MaxEffectiveRunoff=0
              Solute NH4: Thickness=[1800]; InitialValues=[1]; InitialValuesUnits=ppm; WaterTableConcentration=0; D0=0; DepthConstant=0; MaxDepthSoluteAccessible=0; RunoffEffectivenessAtMovingSolute=0; MaxEffectiveRunoff=0
              Solute Urea: Thickness=[1800]; InitialValues=[0]; InitialValuesUnits=ppm; WaterTableConcentration=0; D0=0; DepthConstant=0; MaxDepthSoluteAccessible=0; RunoffEffectivenessAtMovingSolute=0; MaxEffectiveRunoff=0
            SurfaceOrganicMatter: InitialResidueName=nativepasture; InitialResidueType=nativepasture; InitialResidueMass=3335; InitialStandingFraction=0.6; InitialCPR=0; InitialCNR=30
            Plant Cotton: PlantType=Cotton; IsEnding=false; DaysAfterEnding=0
            Report DailyReport: same as Validation.Australia.Burdekin.Burdekin2008.Burdekin2008Base.paddock.DailyReport
            Report HarvestReport: EventNames=[Cotton].Harvesting
              VariableNames:
                [Clock].Today
                [Cotton].Structure.MainStemPrimordiaNo
                [Cotton].Phenology.NFF
                [Cotton].Script.FinalTag
          Folder Soil nitrogen
      Folder Douglas Daly Research Farm Row Spacing Experiment
        Experiment DDRF21
          Factors
            Permutation
              Factor RS: Specification=[Sowing].Script.RowSpacing = 500, 1000, 1500
          Simulation Douglas Daly row spacing experiment 2021
            Clock: Start=2021-01-01; End=2021-06-30
            Summary summaryfile
            Weather: FileName=NT_RS-DDRF2021.met
            SoilArbitrator Soil Arbitrator
            MicroClimate: a_interception=0; b_interception=1; c_interception=0; d_interception=0; SoilHeatFluxFraction=0.4; MinimumHeightDiffForNewLayer=0; NightInterceptionFraction=0.5; ReferenceHeight=2
            Zone paddock: Area=1; Slope=0; AspectAngle=0; Altitude=50
              Manager Sowing
                Crop = [Cotton]
                SowDate = 7-jan
                CultivarName = Sicot_748B3F
                SowingDepth = 30
                RowSpacing = 500
                Population = 7
                script: same as in Validation.Australia.Narrabri Deficit Experiments.NAR0607.Narrabri deficit experiment 200607.paddock.Sowing
              Fertiliser
              Operations FertiliserEvents
                2021-01-28  [Fertiliser].Apply(64.4, Fertiliser.Types.UreaN,10);
                2021-02-16  [Fertiliser].Apply(64.4, Fertiliser.Types.UreaN,10);
              Irrigation
              Manager Harvesting: same as Validation.Australia.Narrabri Deficit Experiments.NAR0607.Narrabri deficit experiment 200607.paddock.Harvesting
              Soil Tindall DDRF 2021: SoilType=Haplic Mesotrophic Red Dermosol; LocalName=Tindall; Site=RS-DDRF; NearestTown=Pine Creek; Region=Daly Basin; State=Northern Territory; Country=Australia; Latitude=-13.83; Longitude=131.21; YearOfSampling=2021; DataSource=CSIRO/NTDPI
                Physical
                  Thickness  BD    AirDry  LL15   DUL   SAT
                  300        1.55  0.04    0.062  0.2   0.36
                  300        1.66  0.12    0.15   0.27  0.32
                  300        1.55  0.135   0.15   0.23  0.37
                  300        1.61  0.15    0.15   0.26  0.34
                  300        1.55  0.15    0.15   0.25  0.36
                  300        1.55  0.15    0.15   0.26  0.36
                  300        1.62  0.15    0.15   0.27  0.34
                  300        1.62  0.15    0.15   0.27  0.34
                  300        1.62  0.15    0.15   0.27  0.34
                  300        1.62  0.15    0.15   0.26  0.34
                  300        1.75  0.15    0.15   0.26  0.31
                  200        1.75  0.15    0.15   0.24  0.29
                  DUL source: Field measured and checked for sensibility
                  SoilCrop CottonSoil
                    LL=[0.06, 0.15, 0.17, 0.19, 0.17, 0.19, 0.19, 0.19, 0.19, 0.19, 0.21, 0.21]
                    KL=[0.1, 0.1, 0.1, 0.09, 0.07, 0.05, 0.03, 0.03, 0.03, 0.03, 0.01, 0.01]
                    XF=[1, 1, 1, 1, 1, 1, 1, 1, 1, 1, 1, 1]
                WaterBalance SoilWater: SummerDate=1-Sep; SummerU=6; SummerCona=3.5; WinterDate=1-Jun; WinterU=4; WinterCona=3.5; DiffusConst=88; DiffusSlope=35.4; Salb=0.13; CN2Bare=80; CNRed=20; CNCov=0.8; PSIDul=-100; SWCON=[1, 0.8, 0.6, 0.4, 0.4, 0.4, 0.4, 0.4, 0.4, 0.4, 0.4, 0.4]
                  Thickness=[300, 300, 300, 300, 300, 300, 300, 300, 300, 300, 300, 200]
                Organic: FOMCNRatio=40; CarbonUnits=Total
                  Thickness  Carbon  SoilCNRatio  FBiom  FInert  FOM
                  300        0.33    12           0.035  0.3     237.302
                  300        0.21    12           0.02   0.3     183.495
                  300        0.16    12           0.02   0.4     141.889
                  300        0.11    12           0.02   0.6     109.717
                  300        0.1     12           0.01   0.9     84.839
                  300        0.1     12           0.01   0.95    65.603
                  300        0.1     12           0.01   0.95    50.728
                  300        0.1     12           0.01   0.95    39.226
                  300        0.1     12           0.01   0.95    30.332
                  300        0.1     12           0.01   0.95    23.454
                  300        0.1     12           0.01   0.95    18.136
                  200        0.05    12           0.01   1       15.279
                CERESSoilTemperature Temperature
                Chemical: PH=[6.185, 6.28, 6.445, 6.356, -, -, -, -, -, -, -, -]; PHUnits=Water
                  Thickness=[300, 300, 300, 300, 300, 300, 300, 300, 300, 300, 300, 200]
                  PH source: Measured (layer 1, 2, 3, 4)
                Nutrient
                Water: RelativeTo=LL15; FilledFromTop=true
                  Thickness=[300, 300, 300, 300, 300, 300, 300, 300, 300, 300, 300, 200]
                  InitialValues=[0.2, 0.27, 0.23, 0.201, 0.15, 0.15, 0.15, 0.15, 0.15, 0.15, 0.15, 0.15]
                Solute NO3: Thickness=[1800]; InitialValues=[3]; InitialValuesUnits=ppm; WaterTableConcentration=0; D0=0; DepthConstant=0; MaxDepthSoluteAccessible=0; RunoffEffectivenessAtMovingSolute=0; MaxEffectiveRunoff=0
                Solute NH4: Thickness=[1800]; InitialValues=[1]; InitialValuesUnits=ppm; WaterTableConcentration=0; D0=0; DepthConstant=0; MaxDepthSoluteAccessible=0; RunoffEffectivenessAtMovingSolute=0; MaxEffectiveRunoff=0
                Solute Urea: Thickness=[1800]; InitialValues=[0]; InitialValuesUnits=ppm; WaterTableConcentration=0; D0=0; DepthConstant=0; MaxDepthSoluteAccessible=0; RunoffEffectivenessAtMovingSolute=0; MaxEffectiveRunoff=0
              SurfaceOrganicMatter: InitialResidueName=nativepasture; InitialResidueType=nativepasture; InitialResidueMass=3833; InitialStandingFraction=0.3; InitialCPR=0; InitialCNR=34
              Plant Cotton: PlantType=Cotton; IsEnding=false; DaysAfterEnding=0
              Report DailyReport: same as Validation.Australia.MyallVale.MyallVale2006.MyallVale2006Base.paddock.DailyReport
              Report HarvestReport: EventNames=[Cotton].Harvesting
                VariableNames:
                  [Clock].Today
                  [Cotton].Structure.MainStemPrimordiaNo
                  [Cotton].Phenology.NFF
                  [Cotton].Script.FinalTag
    Folder Combined Results
      Memo Combined Results
        Simulation results for the combined datasets from the various countries are shown in the following graphs.  The model is able to adequately capture the influence of growing conditions (soil, climate) and management (population, Nitrogen, irrigation, sowing date).
  Folder Sensibility
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