Simulations: Version=169
  Memo
    Bur grows from flowering until cutout

    Lint from XX to startopenbolls

    Seed from xx to maturity??

    1. Thermal Time only drives phenology until flowering. Cutout, bollfilling, maturing driven by supply/demand
    2. Bur have its own HarvestIndex. Bur potenital HI is end of bur growth (40%?)
    3. Seedcotton as seperate CompositeBiomass --> keep Bur seperate

    ***Main issues:***

    1. Phenology needs to work across different cultivars and regions --> need to work in cutout, bollperiod and maturity calculations
    2. Boll demand as a whole not strong enough. N conc correct? BollFilling duration? Partioning? DM/N remobilisation? Leaf senescence?
    3. Node production in MRF21 too high --> need to slow down due to high temperatures? N stress?

    **ARBITRATOR**

    * Copied in WaterUptakeMethod from Sorghum model to calculate SDRatio

    **PHENOLOGY**

    * Phenology in simulations running on set *FixedValues* in Cultivar parameters
    * Is ThermalTime Response correct? See method Bange et al., 2022 (optimum 32oC and base 15.6oC)
    * Cutout script not working correctly --> seems to be a feedback on DM partitioning caused by this?
    * BollFilling Target based on boll period. Function reprocal of Temp
    * Maturing not working correctly --> function based on when cutout occurs

    **LEAF**

    * NodeNumber reduced with WaterFactor (SDRatio)
    * [Leaf].Photosynthesis.RUE.FixedValue = 1.5; [Leaf].SpecificArea.FixedValue = 0.021; [Leaf].AreaLargestLeaf.FixedValue = 0.12 not set in CultivarParameters. RUE can be determined with VPD, SLA with radition (previous week, Reddy) but AreaLargestLeaf?
    * Dynamic RUE --> NAR0607Ir80: average over the growing season is 1.1 (which is similar to fixed RUE of 1.0)
    * Dynamic RUE --> DDRF21RS1000: average growing season is 1.4; similar to 1.5 RUE fixed
    * Boll composed of Bur, Seed, Lint, all with different N-demands.
    * However, it is suggested that RUE is more influenced by radiation https://www.sciencedirect.com/science/article/pii/S0378429099000118#aep-section-id11 (RUE has been shown both experimentally and theoretically to be increased by decreased irradiance and by increased fractions of diffuse radiation. On the other hand, there is little evidence to show that VPD greatly influences RUE.)

    **SIMULATIONS**

    * NAR0607Ir80: Not enough biomass partitioned to Boll; however Lint yield is spot-on
    * DDRF21RS1000: Seems to be working well although NO3 content in the soil not accurate
    * MRF21: canopy too large due to too rapid mainstem node growth (need to be regulated by temp? Is higher in the begin phases compared with DDRF). Leaf growth too large, reproductive growth too little. Problem is most likely N rates and dates which I did not have and have to guess. Also starting N and OM was from adjacent field. NO3 in the soils also seems to be overestimated?
  Memo TitlePage
    # The APSIM Cotton Model

    The APSIM Cotton model has been developed using the Plant Modelling Framework (PMF) of [brown_plant_2014]. This new framework provides a library of plant organ and process submodels that can be coupled, at runtime, to construct a model in much the same way that models can be coupled to construct a simulation. This means that dynamic composition of lower level process and organ classes (e.g. photosynthesis, leaf) into larger constructions (e.g. maize, wheat, sorghum) can be achieved by the model developer without additional coding.

    The model consists of:

    * a phenology model to simulate development between growth phases
    * a structure model to simulate plant morphology
    * a collection of organs to simulate the various plant parts
    * an arbitrator to allocate resources (N, biomass) to the various plant organs
  DataStore
    ExcelInput Observed: FileNames=[Observed\Observed.xlsx]; SheetNames=[CottonObserved]
    PredictedObserved: PredictedTableName=DailyReport; ObservedTableName=CottonObserved; FieldNameUsedForMatch=SimulationName; FieldName2UsedForMatch=Clock.Today; AllColumns=true
    PredictedObserved PredictedObservedHarvest: PredictedTableName=HarvestReport; ObservedTableName=CottonObserved; FieldNameUsedForMatch=SimulationName; FieldName2UsedForMatch=SimulationID; AllColumns=false
  Folder Replacements
    Report DailyReport: EventNames=[Clock].DoReport
      VariableNames:
        [Clock].Today
        [Clock].Today.DayOfYear
        [Weather].Rain
        [Weather].MeanT
        [Weather].MaxT
        [Weather].MinT
        [Weather].Radn
        [Weather].VPD
        [Weather].CO2
        [Cotton].DaysAfterSowing
        [Cotton].Arbitrator.DM.TotalPlantDemand
        [Cotton].Arbitrator.DM.TotalFixationSupply
        [Cotton].Arbitrator.TotalDMFixationSupply
        [Cotton].Arbitrator.N.TotalFixationSupply
        [Cotton].Arbitrator.N.TotalPlantDemand
        [Cotton].Arbitrator.N.TotalPlantSupply
        sum([Cotton].Arbitrator.N.Fixation) as NFixed
        [Cotton].WholePlantGrowthRate
        [Cotton].AboveGroundGrowthRate
        [Cotton].PotentialBollGrowthRate
        [Cotton].NitrogenUptake
        [Cotton].Phenology.Stage
        [Cotton].Phenology.ThermalTime
        [Cotton].Phenology.AccumulatedTT
        [Cotton].Phenology.CurrentStageName
        [Cotton].Phenology.Photoperiod
        [Cotton].Phenology.EmergenceDAS
        [Cotton].Phenology.SquaringDAS
        [Cotton].Phenology.FloweringDAS
        [Cotton].Phenology.CutoutDAS
        [Cotton].Phenology.OpenbollsDAS
        [Cotton].Phenology.MaturityDAS
        [Cotton].Phenology.EarlyFlowering.BollRatio
        [Cotton].Phenology.EarlyFlowering.FractionComplete
        [Cotton].AboveGround.Wt
        [Cotton].AboveGround.N
        [Cotton].AboveGroundLive.Wt
        [Cotton].Boll.Nconc
        [Cotton].Leaf.NodeNumber
        [Cotton].Leaf.Fw
        [Cotton].Leaf.Fn
        [Cotton].Leaf.Photosynthesis.FT
        [Cotton].Leaf.Photosynthesis.FVPD
        [Cotton].Leaf.LAI
        [Cotton].Leaf.HeightFunction
        [Cotton].Leaf.Height
        [Cotton].Leaf.CoverGreen
        [Cotton].Leaf.CoverTotal
        [Cotton].Leaf.Live.Wt
        [Cotton].Leaf.Live.StructuralWt
        [Cotton].Leaf.Live.MetabolicWt
        [Cotton].Leaf.Allocated.MetabolicWt
        [Cotton].Leaf.Allocated.StructuralWt
        [Cotton].Leaf.DMDemand.Total
        [Cotton].Leaf.Dead.StructuralWt
        [Cotton].Leaf.Dead.MetabolicWt
        [Cotton].Leaf.Live.N
        [Cotton].Leaf.Live.NConc
        [Cotton].Leaf.Dead.Wt
        [Cotton].Leaf.Dead.N
        [Cotton].Leaf.Dead.NConc
        [Cotton].Leaf.RadiationIntercepted
        [Cotton].Leaf.Wt
        [Cotton].Leaf.Nconc
        [Cotton].Leaf.N
        [Cotton].Leaf.Senesced.Wt
        [Cotton].Leaf.BranchNumber
        [Cotton].Leaf.SpecificAreaCanopy
        [Cotton].Leaf.Sites
        [Cotton].Leaf.SpecificArea
        [Cotton].Leaf.CoverTotal
        [Cotton].Stem.Wt
        [Cotton].Stem.Total.StructuralWt
        [Cotton].Stem.Live.StructuralWt
        [Cotton].Stem.Live.StructuralN
        [Cotton].Stem.N
        [Cotton].Stem.Nconc
        [Cotton].Lint.Wt
        [Cotton].Lint.N
        [Cotton].Lint.Nconc
        [Cotton].Lint.Bales as Bales
        [Cotton].Lint.Allocated.Wt
        [Cotton].Bur.HarvestIndex
        [Cotton].Bur.PotentialHarvestIndex
        [Cotton].Lint.HarvestIndex
        [Cotton].Lint.PotentialHarvestIndex
        [Cotton].Seed.HarvestIndex
        [Cotton].Seed.PotentialHarvestIndex
        [Cotton].Lint.DMDemand.Total
        [Cotton].Leaf.DMDemand.Total
        [Cotton].Bur.DMDemand.Total
        [Cotton].Seed.DMDemand.Total
        [Cotton].Stem.DMDemand.Total
        ([Cotton].Bur.DMDemand.Total+[Cotton].Lint.DMDemand.Total+[Cotton].Seed.DMDemand.Total) as BollDemand
        ([Cotton].Stem.DMDemand.Total+[Cotton].Leaf.DMDemand.Total) as VegetativeDemand
        //([Cotton].Stem.DMDemand.Total+[Cotton].Leaf.DMDemand.Total+[Cotton].Lint.DMDemand.Total+[Cotton].Seed.DMDemand.Total+[Cotton].Bur.DMDemand.Total) as ShootDMDemand
        ([Cotton].Stem.DMDemand.Total+[Cotton].Leaf.DMDemand.Total+[Cotton].Root.DMDemand.Total) as ShootDMDemand
        [Cotton].Root.DMDemand.Total
        [Cotton].Lint.NDemand.Total
        [Cotton].Leaf.NDemand.Total
        [Cotton].Stem.NDemand.Total
        [Cotton].Root.NDemand.Total
        [Cotton].Root.NUptake
        [Cotton].Lint.LiveFWt
        [Cotton].Root.Wt
        [Cotton].Root.Depth
        [Soil].Water.Volumetric[1:3]
        [Soil].Water.Volumetric
        sum([Soil].SoilWater.ESW) as TotalESW
        [Soil].SoilWater.SW
        ([Soil].SoilWater.SWmm[1]+[Soil].SoilWater.SWmm[2]+[Soil].SoilWater.SWmm[3]+[Soil].SoilWater.SWmm[4]+[Soil].SoilWater.SWmm[5]+[Soil].SoilWater.SWmm[6]) as SWmm1800
        ([Soil].SoilWater.ESW[1]+[Soil].SoilWater.ESW[2]+[Soil].SoilWater.ESW[3]+[Soil].SoilWater.ESW[4]+[Soil].SoilWater.ESW[5]+[Soil].SoilWater.ESW[6]) as ESW1800
        sum([Soil].Water.Volumetric) as TotalSWC
        sum([Soil].Water.MM) as TotalWaterMM
        ([Soil].Water.MM[1]+[Soil].Water.MM[2]+[Soil].Water.MM[3]+[Soil].Water.MM[4]+[Soil].Water.MM[5]+[Soil].Water.MM[6]+[Soil].Water.MM[7]) as SW1500mm
        ([Soil].Water.MM[1]+[Soil].Water.MM[2]+[Soil].Water.MM[3]+[Soil].Water.MM[4]+[Soil].Water.MM[5]+[Soil].Water.MM[6]) as SW1800mm
        ([Soil].Water.MM[1]+[Soil].Water.MM[2]+[Soil].Water.MM[3]+[Soil].Water.MM[4]+[Soil].Water.MM[5]) as SW1200mm
        (sum([CottonSoil].PAWmm)/sum([CottonSoil].PAWCmm)) as AvailableSoilMoisture
        ([CottonSoil].PAWmm[1]+[CottonSoil].PAWmm[2]+[CottonSoil].PAWmm[3]+[CottonSoil].PAWmm[4]+[CottonSoil].PAWmm[5]) as PAWTop5Layers
        -(([CottonSoil].PAWCmm[1]+[CottonSoil].PAWCmm[2]+[CottonSoil].PAWCmm[3]+[CottonSoil].PAWCmm[4]+[CottonSoil].PAWCmm[5])-([CottonSoil].PAWmm[1]+[CottonSoil].PAWmm[2]+[CottonSoil].PAWmm[3]+[CottonSoil].PAWmm[4]+[CottonSoil].PAWmm[5])) as SoilWaterDeficit120
        [Irrigation].IrrigationApplied
        [Cotton].Boll.Wt
        [Cotton].Lint.Wt
        [Cotton].Seed.Wt
        ([Cotton].Seed.Wt+[Cotton].Lint.Wt) as SeedLint
        [Cotton].Bur.Wt
        sum([Soil].SoilWater.SWmm) as TotalSWmm
        ([Soil].SoilWater.SWmm[1]) as SW1
        ([Soil].SoilWater.SWmm[2]) as SW2
        ([Soil].SoilWater.SWmm[3]) as SW3
        ([Soil].SoilWater.SWmm[4]) as SW4
        ([Soil].SoilWater.SWmm[5]) as SW5
        ([Soil].SoilWater.SWmm[6]) as SW6
        ([Soil].SoilWater.SWmm[1]+[Soil].SoilWater.SWmm[2]+[Soil].SoilWater.SWmm[3]+[Soil].SoilWater.SWmm[4]+[Soil].SoilWater.SWmm[5]+[Soil].SoilWater.SWmm[6]) as SWmm1800
        //to disable reporting
        //([Soil].SoilWater.SWmm[7]) as SW7
        //([Soil].SoilWater.SWmm[8]) as SW8
        //([Soil].SoilWater.SWmm[1]+[Soil].SoilWater.SWmm[2]+[Soil].SoilWater.SWmm[3]+[Soil].SoilWater.SWmm[4]+[Soil].SoilWater.SWmm[5]+[Soil].SoilWater.SWmm[6]+[Soil].SoilWater.SWmm[7]+[Soil].SoilWater.SWmm[8]) as SWmm2400
        [Soil].SoilWater.ESW[1] as ESW1
        [Soil].SoilWater.ESW[2] as ESW2
        [Soil].SoilWater.ESW[3] as ESW3
        [Soil].SoilWater.ESW[4] as ESW4
        [Soil].SoilWater.ESW[5] as ESW5
        [Soil].SoilWater.ESW[6] as ESW6
        [Soil].SoilWater.ESW[7] as ESW7
        [Soil].SoilWater.PAWmm[1] as PAW1
        [Cotton].Arbitrator.SDRatio
        [Cotton].Arbitrator.SDRatioBound
        sum([Soil].NO3.kgha) as TotalSoilNO3
        sum([Soil]..NH4.kgha) as TotalSoilNH4
        sum([Soil].Water.MM) as TotalSW
        sum([Soil].NO3.ppm) as NO3
        sum([Soil].NH4.ppm) as NH4
        [Soil].NO3.ppm[1] as NO3_1_ppm
        [Soil].NO3.ppm[2] as NO3_2_ppm
        [Soil].NO3.ppm[3] as NO3_3_ppm
        [Soil].NO3.ppm[4] as NO3_4_ppm
        [Soil].NO3.ppm[5] as NO3_5_ppm
        [Soil].NO3.ppm[6] as NO3_6_ppm
        [Soil].NO3.kgha[1] as NO3_1_kgha
        [Soil].NO3.kgha[2] as NO3_2_kgha
        [Soil].NO3.kgha[3] as NO3_3_kgha
        [Soil].NO3.kgha[4] as NO3_4_kgha
        [Soil].NO3.kgha[5] as NO3_5_kgha
        [Soil].NO3.kgha[6] as NO3_6_kgha
        [Fertiliser].NitrogenApplied
        [Cotton].NitrogenUptake
        [Cotton].Total.N
        [Cotton].Leaf.Photosynthesis.RUE
        [Cotton].Boll.N
        [Cotton].Leaf.N
        [Cotton].Stem.N
        //[FurrowIrrigation].Script.crit_fr_asw as CRITFRASW
        //[FurrowIrrigation].Script.asw_depth as ASWDEPTH
        //[FurrowIrrigation].Script.applied_furrow_irrigation as FURROW_APPLIED
        [Irrigation].IrrigationApplied
        [Cotton].Boll.HarvestIndex
        [Soil].Organic.Carbon
        [Phenology].CurrentPhaseName
        [Arbitrator].TotalDMFixationSupply
        [Phenology].FruitDemand
        [Phenology].BollPeriod
        [Phenology].BollFilling.Target
    Report HarvestReport: EventNames=[Cotton].Harvesting
      VariableNames:
        [Clock].Today
        [Cotton].Phenology.CurrentStageName
        [Cotton].Phenology.EmergenceDAS
        [Cotton].Phenology.SquaringDAS
        [Cotton].Phenology.FloweringDAS
        [Cotton].Phenology.CutoutDAS
        [Cotton].Phenology.OpenbollsDAS
        [Cotton].Phenology.MaturityDAS
        [Cotton].AboveGround.Wt
        [Cotton].Boll.Wt
    Plant Cotton: PlantType=Soybean
      OrganArbitrator Arbitrator
        BiomassTypeArbitrator DMArbitration
          Folder PotentialPartitioningMethods
            ReallocationMethod
            AllocateFixationMethod
            RetranslocationMethod
            SendPotentialDMAllocationsMethod
          Folder AllocationMethods
            NutrientConstrainedAllocationMethod
            DryMatterAllocationsMethod
          RelativeAllocation ArbitrationMethod
        BiomassTypeArbitrator NArbitration
          Folder PotentialPartitioningMethods
            ReallocationMethod
          Folder ActualPartitioningMethods
            AllocateFixationMethod
            RetranslocationMethod
          Folder AllocationMethods
            NitrogenAllocationsMethod
          RelativeAllocation ArbitrationMethod
          AllocateUptakesMethod
        NitrogenUptakeMethod
        C4WaterUptakeMethod WaterUptakeMethod
          Memo
            Taken from Sorghum model
        VariableReference SDRatio: VariableName=[Arbitrator].WaterUptakeMethod.SDRatio
        VariableReference WDemand: VariableName=[Arbitrator].WaterUptakeMethod.WDemand
        VariableReference WSupply: VariableName=[Arbitrator].WaterUptakeMethod.WSupply
        VariableReference WAllocated: VariableName=[Arbitrator].WaterUptakeMethod.WAllocated
        VariableReference WatSupply: VariableName=[Arbitrator].WaterUptakeMethod.WatSupply
        BoundFunction SDRatioBound
          VariableReference SDRatio: VariableName=[Arbitrator].WaterUptakeMethod.SDRatio
          Constant Lower: FixedValue=0
          Constant Upper: FixedValue=1.5
      Phenology
        Memo
          9/11/2023: From Dean

          "Hi Tiemen

          I’m not an expert on this but…

          Phenology will move from one phase to the next when the value of ‘Progression’ is > ‘Target’ so…

          The ‘Progression’ is the variable that gets tested to see if it is above target so I would use a simple VariableReference (instead of a LessThanFunction) and set it to [Phenology].FruitDemand. This will remove thermal time from this phase which I think is what you’re after.

          The ‘Target’ is used to move phenology from one phase to another. I would set the target to  ([Arbitrator].TotalDMFixationSupply.

          Try this and see if it works.
          Dean"

          7/11/2023:

          Reset to vegetative growth, see example: .Simulations.Simulation.Field.Chicory.Phenology.GotoPhase

          .Simulations.Simulation.Field.PlantainForage.Phenology.GotoPhase

          .Simulations.Simulation.Field.WhiteClover.Phenology.PhenologyRewind

          6/07/2023:

          The following crop phases are distinguished:

          Phase number | Phase Name | Initial Stage | Final stage
          -------------|------------|---------------|------------
          1 ||| Sowing
          2 | Germinating | Sowing | Germination
          3 | Emerging | Germination | Emergence
          4 | Vegetative | Emergence | StartSquaring
          5 | Squaring | StartSquaring | StartFlowering
          6 | EarlyFlowering | StartFlowering | Cutout
          7 | BollFilling | Cutout | StartOpenBolls
          8 | Maturing | StartOpenBolls | Maturity

          **4/07/2023: add TemperatureModifier for ThermalTime. --> OR JUST NEED TO REVISE XY RESPONSE OF THERMAL TIME, AND INTERPOLATION METHOD?**

          From Yeates et al., 2010: The frequency of temperatures >35°C and <11°C affected time to squaring, requiring modification of existing development models derived in temperate climates. It was concluded sowing during March to April
          should achieve the dual objectives of high yields and avoidance of rain at maturity.

          Include stress factors that can delay or speed up phenology phases?

          Temperature effect on phenology: supra (>35°C) and sub-optimal (<11°C) temperatures increasing the number of nodes to the first fruiting (1st square) --> see canola model. Use base DD x temp response x y pair. X = min or max temp (ADD TEMPERATURE EFFECT). Or at Canola.earlypoddevelopment add a stressfactor.

          **PHENOLOGY**

          The following crop phases are distinguished:

          Phase number | Phase Name | Initial Stage | Final stage
          -------------|------------|---------------|------------
          1 ||| Sowing
          2 | Germinating | Sowing | Germination
          3 | Emerging | Germination | Emergence
          4 | PreSquaring | Emergence | StartSquaring
          5 | Squaring | StartSquaring | StartFlowering
          6 | EarlyFlowering | StartFlowering | Cutout
          7 | LateFlowering | Cutout | StartBollFilling
          8 | BollFilling | StartBollFilling | StartOpenBolls
          9 | Maturing | StartOpenBolls | Maturity
          10 | ReadyForHarvesting | Maturity | HarvestRipe

          In the flowering phase **cutout** occurs when the growth rate of the fruit (FGR) = growth rate of shoot (CGR)

          The BollFilling phase can be apportioned in separate phases if needed (APSIM-OZCOT).
          See also:

          * *Hearn, A.B., 1994. OZCOT: A Simulation Model for Cotton Crop Management. Agric. Syst., 44: 257–299.*

          Phase number | Phase Name | Initial Stage | Final stage | Target
          -------------|------------|---------------|-------------|--------
          5 | Flowering | StartFlowering | StartEarlyBollDevelopment | FractionofBollFilling = 0.07
          6 | EarlyBollFilling | StartEarlyBollDevelopment | StartMidBollDevelopment | FractionofBollFilling = 0.21
          7 | MidBollFilling | StartMidBollDevelopment | StartLateBollDevelopment | FractionofBollFilling = 0.33
          8 | LateBollFilling | StartLateBollDevelopment | EndBollDevelopment | FractionofBollFilling = 0.55
          9 | EndBollFilling | EndBollDevelopment | StartOpenBolls | EntireBollFillPeriod = 400 DD
          10 | Maturing | StartOpenBolls | Maturity |

          **42 is the number of heat units from emergence until the appearance of the first fruiting branch (Constable, 1976):**

          * *Jackson, B.S., Arkin, G.F. and Hearn, A.B., 1988. The Cotton Simulation Model "COTTAM": Fruiting Model Calibration and Testing. American Society of Agricultural Engineers, 31(3): 846–854.*
        AddFunction FruitDemand
          VariableReference BurDemand: VariableName=[Bur].DMDemand.Total
          VariableReference SeedDemand: VariableName=[Seed].DMDemand.Total
          VariableReference LintDemand: VariableName=[Lint].DMDemand.Total
        DivideFunction FruitDemandSupplyRatio
          VariableReference FruitDemand: VariableName=[Phenology].FruitDemand
          VariableReference TotalDMFixationSupply: VariableName=[Arbitrator].TotalDMFixationSupply
        LinearInterpolationFunction CutoutProgression
          XYPairs: X=[0, 1, 1.01]; Y=[0, 0, 500000000000]
          VariableReference XValue: VariableName=[Phenology].FruitDemandSupplyRatio
        LinearInterpolationFunction B_PERprogression
          XYPairs: X=[0, 1, 1.01]; Y=[0, 0, 500000000000]
          VariableReference XValue: VariableName=[Phenology].BollPeriod
        AccumulateFunction BollPeriod: StartStageName=StartFlowering; EndStageName=HarvestRipe; FractionRemovedOnCut=0; FractionRemovedOnHarvest=0; FractionRemovedOnGraze=0; FractionRemovedOnPrune=0
          ExpressionFunction B_PER: Expression=1/EXP(5.385-0.0512*[Weather].MeanT)
        SubDailyInterpolation ThermalTime: agregationMethod=0
          Memo
            7/11/2023: Add stress factor to phenology based on temperature? See .Simulations.Canola Example.Zone.Canola.Phenology.EarlyPodDevelopment.Stress

            So, make the model work for NAR0607Ir80, and add stress to make it work for DDRF21RS1000

            7/11/2023: other examples:

            X|Y
            -|-
            15.6|0
            32|16.4
            45|0   (or 43, 40?)

            X|Y
            -|-
            15.6|0
            32|16.4
            35|16.4
            45|0

            7/11/2023: Luo, Bange, Clancy 2014: Tmax 35oC --> heat stress

            ===================================================================================

            See Bange et al., 2002: Approach two DD calculation where Tmax <35oC and Tmx >=35oC

            On 4/07/2023:

            X|Y
            -|-
            15.6|0
            32|16.4
            43|16.4
            45|0

            Base temperature of 15.6 oC and optimum temperature of 32 oC taken from:

            * *Bange, M. et al., 2022. Improving temperature‐based predictions of the timing of flowering in cotton. Agron. J., 114(5): 2728-2742.*

            U.S. Approach with:

            Squaring target - 343 DD (from planting)

            Flowering target - 584 DD (from planting)
          XYPairs Response: X=[15.6, 32, 39]; Y=[0, 16.4, 0]
          ThreeHourAirTemperature InterpolationMethod
        PhotoperiodFunction Photoperiod: Twilight=0; DayLength=0
        GerminatingPhase Germinating: Start=Sowing; End=Germination; IsEmerged=false
        EmergingPhase Emerging: Start=Germination; End=Emergence; IsEmerged=true; TTForTimeStep=0
          VariableReference ThermalTime: VariableName=[Phenology].ThermalTime
          AddFunction Target
            Constant ShootLag: FixedValue=10
            MultiplyFunction DepthxRate
              VariableReference SowingDepth: VariableName=[Plant].SowingData.Depth
              Constant ShootRate: FixedValue=1
        GenericPhase Vegetative: Start=Emergence; End=StartSquaring; IsEmerged=true
          SubtractFunction Target
            Constant SquaringTT: FixedValue=343
            VariableReference Emerging: VariableName=[Phenology].Emerging.Target
          VariableReference Progression: VariableName=[Phenology].ThermalTime
        GenericPhase Squaring: Start=StartSquaring; End=StartFlowering; IsEmerged=true
          SubtractFunction Target
            Constant FloweringTT: FixedValue=584
            VariableReference Emerging: VariableName=[Phenology].Emerging.Target
            VariableReference PreSquaring: VariableName=[Phenology].Vegetative.Target
          VariableReference Progression: VariableName=[Phenology].ThermalTime
        GenericPhase EarlyFlowering: Start=StartFlowering; End=Cutout; IsEmerged=true
          Memo
            8/11/2023 - Concept: **Bange, M. P., & Milroy, S. P. (2004). Growth and dry matter partitioning of diverse cotton genotypes. Field Crops Research, 87(1), 73-87. https://doi.org/10.1016/j.fcr.2003.09.007**

            Add (water)stress effect in cases where severe water deficit cutout reached earlier. See Hearn, 1969 paper where when 2/3 water supply depleted --> node production halts and plant shifts into cutout.

            From PhD Warren Conaty:

            Water stress also alters the time taken for a boll to reach maturity. Water deficits result in the hastening of maturity, whilst excessive soil water tends to slow maturity (Hearn, 1994; Hearn, 1979; Marani and Amirav, 1971b; Marani and Amirav, 1971a). This occurs as a result of the inherent plant water relations fixed within commercial cotton cultivars derived from its wild xerophytic ancestors. As a result, when two thirds of the soil water is used, vegetative growth ceases, boll setting and square production cease and the retained bolls mature. Boll setting and square production can resume, if conditions are favourable, when mature bolls open, leading to a second fruiting flush (Hearn, 1979).
          Constant Target: FixedValue=1
          MaximumFunction Progression
            SubtractFunction DailyValue
              VariableReference CurrentProgress: VariableName=[EarlyFlowering].BollRatio
              VariableReference YesterdaysProgress: VariableName=[EarlyFlowering].FractionComplete
            Constant Zero: FixedValue=0
          MinimumFunction BollRatio
            Constant One: FixedValue=1
            DivideFunction Calculation
              VariableReference PotentialBollGrowthRate: VariableName=[Cotton].PotentialBollGrowthRate
              VariableReference AboveGroundGrowthRate: VariableName=[Cotton].AboveGroundGrowthRate
        GenericPhase BollFilling: Start=Cutout; End=StartOpenBolls; IsEmerged=true
          Memo
            On Thermal time use:

            Target = 100

            Progression = [Phenology].ThermalTime

            ==========================================================

            When Progression >1, move to next phase
          Constant Target: FixedValue=400000
          VariableReference Progression: VariableName=[Phenology].B_PERprogression
        GenericPhase Maturing: Start=StartOpenBolls; End=Maturity; IsEmerged=true
          Memo
            From PhD Warren Conaty:

            Page 28/29: Water stress also alters the time taken for a boll to reach maturity. Water deficits result in the hastening of maturity, whilst excessive soil water tends to slow maturity (Hearn, 1994; Hearn, 1979; Marani and Amirav, 1971b; Marani and Amirav, 1971a).
          SubtractFunction Target
            ExpressionFunction MaturityDuration: Expression=0.81*([Phenology].CutoutDAS)+73
            VariableReference BollFilling: VariableName=[Phenology].OpenbollsDAS
          Constant Progression: FixedValue=1
        GenericPhase Ripening: Start=Maturity; End=HarvestRipe; IsEmerged=true
          Constant Target: FixedValue=50
          VariableReference Progression: VariableName=[Phenology].ThermalTime
        EndPhase ReadyForHarvesting: Start=HarvestRipe; End=Unused; IsEmerged=true
          VariableReference ThermalTime: VariableName=[Phenology].ThermalTime
        OnEventFunction EmergenceDAS: SetEvent=Emergence; ReSetEvent=never
          Memo
            A function is used to provide emergence date as days after sowing(DAS).
          Constant PreEventValue: FixedValue=0
          VariableReference PostEventValue: VariableName=[Plant].DaysAfterSowing
        OnEventFunction SquaringDAS: SetEvent=StartSquaring; ReSetEvent=never
          Memo
            A function is used to provide squaring date as days after sowing(DAS).
          Constant PreEventValue: FixedValue=0
          VariableReference PostEventValue: VariableName=[Plant].DaysAfterSowing
        OnEventFunction FloweringDAS: SetEvent=StartFlowering; ReSetEvent=never
          Memo
            A function is used to provide flowering date as days after sowing(DAS).
          Constant PreEventValue: FixedValue=0
          VariableReference PostEventValue: VariableName=[Plant].DaysAfterSowing
        OnEventFunction CutoutDAS: SetEvent=Cutout; ReSetEvent=never
          Memo
            A function is used to provide emergence date as days after sowing(DAS).
          Constant PreEventValue: FixedValue=0
          VariableReference PostEventValue: VariableName=[Plant].DaysAfterSowing
        OnEventFunction OpenbollsDAS: SetEvent=StartOpenBolls; ReSetEvent=never
          Memo
            A function is used to provide flowering date as days after sowing(DAS).
          Constant PreEventValue: FixedValue=0
          VariableReference PostEventValue: VariableName=[Plant].DaysAfterSowing
        OnEventFunction MaturityDAS: SetEvent=Maturity; ReSetEvent=never
          Memo
            A function is used to provide maturity date as days after sowing(DAS).
          Constant PreEventValue: FixedValue=0
          VariableReference PostEventValue: VariableName=[Plant].DaysAfterSowing
        GenericPhase EarlyFloweringTEST2 (disabled): IsEmerged=false
          Memo
            8/11/2023 - Concept: **Bange, M. P., & Milroy, S. P. (2004). Growth and dry matter partitioning of diverse cotton genotypes. Field Crops Research, 87(1), 73-87. https://doi.org/10.1016/j.fcr.2003.09.007**

            Add (water)stress effect in cases where severe water deficit cutout reached earlier. See Hearn, 1969 paper where when 2/3 water supply depleted --> node production halts and plant shifts into cutout.

            From PhD Warren Conaty:

            Water stress also alters the time taken for a boll to reach maturity. Water deficits result in the hastening of maturity, whilst excessive soil water tends to slow maturity (Hearn, 1994; Hearn, 1979; Marani and Amirav, 1971b; Marani and Amirav, 1971a). This occurs as a result of the inherent plant water relations fixed within commercial cotton cultivars derived from its wild xerophytic ancestors. As a result, when two thirds of the soil water is used, vegetative growth ceases, boll setting and square production cease and the retained bolls mature. Boll setting and square production can resume, if conditions are favourable, when mature bolls open, leading to a second fruiting flush (Hearn, 1979).
          VariableReference Target: VariableName=[Arbitrator].TotalDMFixationSupply
          VariableReference Progression: VariableName=[Phenology].FruitDemand
        GenericPhase EarlyFloweringTEST3 (disabled): IsEmerged=false
          Memo: same as Replacements.Cotton.Phenology.EarlyFloweringTEST2.Memo
          Constant Target: FixedValue=4000000
          VariableReference Progression: VariableName=[Phenology].CutoutProgression
      SimpleLeaf Leaf: Albedo=0.25; Gsmax350=0.015; R50=150; LeafInitialisationStage=Emergence; Height=0; BaseHeight=0; Width=0; FRGR=0; PotentialEP=0; WaterDemand=0; KDead=0.2; LAIDead=0
        Memo
          16/05/2023:

          Leaf senescence from flowering:
          - water
          - age
          - shade

          Leaf area reduction:
          - water
          - temp?
          - nitrogen?

          =================================================

          AreaLargestLeaf should be larger

          AND

          SpecificArea (SLA) should be more flexible

          ==================================================

          Canopy growth should go steeper in begin phases. There seems to be a lag?

          ==================================================

          Crop Phases:

          Phase number | Phase
          -------------|------
          1 | Sowing
          2 | Germination
          3 | Emergence
          4 | StartSquaring
          5 | StartFlowering
          6 | Cutout
          7 | StartBollFilling
          8 | StartOpenBolls
          9 | Maturity
          10 | HarvestRipe
        RUEModel Photosynthesis
          Constant RUE: FixedValue=1.2
          WeightedTemperatureFunction FT: MaximumTemperatureWeighting=0.5
            Memo
              X|Y
              -|-
              8|0
              25|1
              35|1
              45|0

              Change to:

              X|Y
              -|-
              10|0
              23.5|1
              32|1
              45|0

              ============================

              SEE PHD CONATY

              ============================

              Base temp of 10 oC from:

              Snider, J.L. et al., 2022. Net photosynthesis acclimates to low growth temperature in cotton seedlings by shifting temperature thresholds for photosynthetic component processes and respiration. Environ. Exp. Bot., 196.

              Combing data from:

              **FIG. 2**

              * *Conaty, W.C., Burke, J.J., Mahan, J.R., Neilsen, J.E. and Sutton, B.G., 2012. Determining the Optimum Plant Temperature of Cotton Physiology and Yield to Improve Plant-Based* Irrigation Scheduling. Crop Sci., 52(4): 1828-1836.

              **FIG. 22.4**

              * *Snider, J., Bange, M. and Heitholt, J., 2021. Chapter 22. Cotton. In: V.O. Sadras and D.F. Calderini (Editors), Crop Physiology. Case Histories for Major Crops, pp. 715-746.*

              Using a base temp of 10 oC

              OZCOT uses base temperature of 8 oC for assimilate production

              From:

              * *Constable, G.A. and Bange, M.P., 2015. The yield potential of cotton (Gossypium hirsutum L.). Field Crops Res., 182: 98-106.*

              --> With a base temperature for development of 11.4–15 ◦C (Moraghan et al., 1968; Constable, 1976; Kerby et al., 1987), thermal kinetic window of 23.5–32.0 ◦C (Burke et al., 1988), and physiological optimum of 28 ◦C (Conaty et al., 2012).
            XYPairs: X=[8, 23.5, 32, 45]; Y=[0, 1, 1, 0]
          LinearInterpolationFunction FVPD
            Memo
              Photosynthesis was relatively insensitive to VPD as it decreased on average only 13% (SD = 5.0, n = 42) from the maximum photosynthetic rate over a wide range of VPD (1 kPa~4 kPa)

              **FIG. 2C**

              * *Duursma, R.A. et al., 2013. Near-optimal response of instantaneous transpiration efficiency to vapour pressure deficit, temperature and [CO2] in cotton (Gossypium hirsutum L.). Agric. For. Meteorol., 168: 168-176.*
            XYPairs: X=[0, 10, 40]; Y=[1, 1, 0.87]
            VariableReference XValue: VariableName=[Leaf].Photosynthesis.VPD
          LinearInterpolationFunction FN
            XYPairs: X=[0, 1, 1.5]; Y=[0, 1, 1]
            VariableReference XValue: VariableName=[Leaf].Fn
          LinearInterpolationFunction FW
            XYPairs: X=[0, 1]; Y=[0, 1]
            VariableReference XValue: VariableName=[Leaf].Fw
          RUECO2Function FCO2: PhotosyntheticPathway=C3
          VariableReference RadnInt: VariableName=[Leaf].RadiationIntercepted
        StomatalConductanceCO2Modifier
          VariableReference PhotosynthesisCO2Modifier: VariableName=[Leaf].Photosynthesis.FCO2
        MultiplyFunction Area
          VariableReference SLA: VariableName=[Leaf].SpecificArea
          VariableReference LeafLiveWt: VariableName=[Leaf].Live.Wt
        MinimumFunction FRGR
          VariableReference RUE_FT: VariableName=[Leaf].Photosynthesis.FT
          VariableReference RUE_FN: VariableName=[Leaf].Photosynthesis.FN
          VariableReference RUE_FVPD: VariableName=[Leaf].Photosynthesis.FVPD
        Constant ExtinctionCoefficient: FixedValue=0.69
          Memo
            This model assumes that all metabolic and storage N is available for reallocation from senescing leaves.
        LinearInterpolationFunction HeightFunction
          Memo
            **THIS NEEDS TO BE REVISED**

            ===============================

            In APSIM-OZCOT, height is based off stem weight if have XY pairs on observed data (see also chickpea example).

            In *Zhang, L. et al., 2021. Development and validation of SUCROS-Cotton: a potential crop growth simulation model for cotton. NJAS: Wageningen Journal of Life Sciences, 56(1-2): 59-83.*

            --> Plant height is modelled as a linear function of (T) until growth is terminated by removal of the top bud ('cut-out')

            --> Final plant height is also a function of the extension of main stem nodes

            I used XY pairs from *CottonObserved 20230124.xlsx*

            ===================================================================================

            On 08/05/2023:

            XY values taken from NAR0607Ir80 data

            Before 08/05/2023 (from DDRF-RS trial):

            X|Y
            -|-
            0|10
            50|540
            100|750
            150|950
            200|1165
            250|1380
            300|1580
          XYPairs: X=[0, 40, 100, 200, 250]; Y=[5, 300, 550, 720, 800]
          VariableReference XValue: VariableName=[Stem].Wt
        MultiplyFunction Phyllochron
          Memo
            The mainstem was therefore a simple parameter for the effect of age, temperature and water on the development of plant structure.

            The relationship was explained by a model in which fruiting branches compete with one another. The structure of the crop plants, as measured by the types and number of nodes, developed along a course in time determined by variety and spacing at a rate dependent on temperature.

            The rate decreased with age, but was **independent of the quantity of water available**, **until a critical amount had been used, when development stopped abruptly.**

            **--> USE ASPF FACTOR to stop node production?!?!?**

            From PhD Warren Conaty:

            The relationship between morphogenesis and water supply in cotton is that once the cropgerminates, **morphogenesis is unaffected by water supply until approximately two-thirds of available water has been depleted**. At this point, the production of squares ceases, and if water supply is not replenished crop growth terminates and the set fruit is matured (Hearn and Constable, 1984).

            ========================

            * Use separate thermal time in phenology for phyllochron?
            * fruitload slows down node-development and halts at cutout

            ========================

            FROM: *Hearn, A.B., 1994. The principles of cotton water relations and their application in management. In: G.A. Constable and N.W. Forrester (Editors), Challenging the Future: Proceedings of the World Cotton Research Conference. CSIRO, Brisbane, Australia, pp. 66–92.*

            The plants with different amounts of stored water
            develop at the same rate unaffected by the amount of water,
            until approximately three quarters is exhausted, whereupon
            morphological development and vegetative growth stop
            abruptly. Consequently, the final size and shape of the plants
            grown with different amounts of stored water look like
            successive stages of one crop, which in effect is what they are.
            This pattern of development is well adapted for survival in
            arid' and semi-arid environments where the water supply
            from rainfall or floods is erratic and variable. It allows the
            plant to make full use of supplies which can va1y greatly from
            one event or season to the next. When the supply is large,
            development continues for longer to give a larger plant and
            heavier yield, when the supply is !imaU the reverse occurs.
            The key is that the plant somehow recognises that the water
            supply is running out (the dry 'signal' in Fig. 2), and in
            response stops further morphological development and
            concentrates on maturing the fruit already set.
          Constant: FixedValue=1
          LinearInterpolationFunction Potential
            Memo
              1. Need to develop ThermalTime for Phyllochron in [Cotton].Phenology
              2. Use 42 DD

              ====================================================================

              From PhD Warren Conaty:

              The morphogenic relationship with temperature is described by the accumulation of degree days over a **base temperature of 12 °C**, where a new node is produced every **40 degree days** provided other factors are not limiting (Hearn and Constable, 1984)

              **NOTE**

              Changed phyllochron to 35 (for better fit) and removed 100 at cutout because nitrogen is mobilized at this point. N stress very high and ceases node production

              42 DD from:

              * *Northern Australia Broadacre Cropping Manual. 2022. NT Farmers*

              41 DD from:

              * *Constable, G.A., 1986. Growth and light receipt by mainstem cotton leaves in relation to plant density in the field. Agric. For. Meteorol., 37: 279-292.*

              43 DD60 from:

              * *Stewart, J.M., Oosterhuis, D., Heitholt, J.J. and Mauney, J. (Editors), 2010. Physiology of Cotton, 563 pp.* (page 306).

              "Early-season node development is highly linearly related (R2 = 0.95) to DD60 accumulation (Kerby et al., 1997). From emergence until about the 15th node, a new node is produced on average every 43 DD60."
            XYPairs: X=[3, 4, 5, 6]; Y=[32, 32, 32, 32]
            VariableReference XValue: VariableName=[Phenology].Stage
        AddFunction NodeNumber
          Memo
            **06/11/2023: add temp effect to node development

            **12/07/2023 --> add temperature effect? Above 35oC no node development?? or at least slows down (see site MRF21) --> add to phenology thermal time calculations?**

            **Nodes develop slower with water stress!!!!!**

            ======================================================================

            ADD WATER STRESS HERE!

            WATER STRESS HALTS NODE PRODUCTION --> SEE KRS19RF DATA!

            TEMP EFFECT?

            ALSO ADD COVER EFFECT:

            SEE DDRF-RS DATA --> 0.5 M TREATMENT LESS NODES, AT COVER CLOSURE HALT NODE PRODUCTION

            Node production as function of day degree accumulation.

            **Need to add a term that provides negative feedback from metabolic stress (as fruit load increases and cutout is reached), eventually halting node (in Hearn, 1994: node = site) production.**

            Stage name to stop accumulation set on **cutout**
          Constant Initial: FixedValue=0
          AccumulateFunction Change: StartStageName=Emergence; EndStageName=Cutout; FractionRemovedOnCut=1; FractionRemovedOnHarvest=1; FractionRemovedOnGraze=1; FractionRemovedOnPrune=0
            MultiplyFunction DeltaNode
              DivideFunction Delta
                Memo
                  Use different thermal time for phyllochron? --> mainstem node accumulation

                  "Vegetative thermal time" see Mungbeanand Peanut model
                VariableReference ThermalTime: VariableName=[Phenology].ThermalTime
                VariableReference Phyllochron: VariableName=[Leaf].Phyllochron
              LinearInterpolationFunction WaterFactor
                XYPairs: X=[1, 1.5]; Y=[0, 1]
                VariableReference XValue: VariableName=[Arbitrator].SDRatioBound
                Memo
                  3/11/2023

                  Changed:

                  X | Y
                  --|--
                  0.5 | 0
                  1.5 | 1

                  To:

                  X | Y
                  --|--
                  1 | 0
                  1.5 | 1

                  =====================================================

                  This should be calculated for the rooting depth only!!!!!
        AccumulateFunction BranchNumber: StartStageName=Emergence; EndStageName=Cutout; FractionRemovedOnCut=1; FractionRemovedOnHarvest=1; FractionRemovedOnGraze=1; FractionRemovedOnPrune=0
          MultiplyFunction DeltaBranch
            Memo
              SEE BRANCHING IN CANOLA MODEL

              =================================================

              For TEMP effects on branching see:

              Hodges, H.F., Reddy, K.R., McKinion, J.M. and Reddy, V.R., 1993. Temperature Effects on Cotton, Mississippi State University, Mississippi, USA.

              Distinguish between Vegetative and Fruiting branching? Seems to be a different relationship with temperature: FIG. 6A page 5
            VariableReference DeltaNode: VariableName=[Leaf].NodeNumber.Change.DeltaNode
            LinearInterpolationFunction Branching_Rate
              Memo
                Changed from:

                X | Y
                --|--
                1|0
                4|0
                4.1|1
                30|1
              XYPairs: X=[1, 7, 7.1, 30]; Y=[0, 0, 1, 1]
              VariableReference XValue: VariableName=[Leaf].NodeNumber
            LinearInterpolationFunction CoverFactor
              Memo
                08/05/2023

                See 'CrowdingFunction' .Simulations.RussetBurbank.Field.Potato.Structure.BranchingRate.CrowdingFunction
              XYPairs: X=[0, 0.33, 0.9, 1]; Y=[1, 1, 1, 0]
              VariableReference XValue: VariableName=[Leaf].CoverTotal
            LinearInterpolationFunction WaterFactor
              XYPairs: X=[0.8, 1]; Y=[0, 1]
              VariableReference XValue: VariableName=[Leaf].Fw
            LinearInterpolationFunction TemperatureFactor
              XYPairs: X=[20, 28, 32, 40]; Y=[1, 1, 1, 1]
              VariableReference XValue: VariableName=[Weather].MeanT
        AccumulateFunction Sites: StartStageName=Emergence; EndStageName=Cutout; FractionRemovedOnCut=1; FractionRemovedOnHarvest=1; FractionRemovedOnGraze=1; FractionRemovedOnPrune=0
          Memo
            Different phyllochron for leaf appearance of Fruiting Branches compared with mainstem:

            * *Reddy, K.R., Hodges, H.F. and McKinion, J.M., 1997. Modeling temperature effects on cotton internode and leaf growth. Crop Sci., 37(2): 503-509.*
          PhaseLookupValue SiteProduction: Start=Emergence; End=Maturity
            MultiplyFunction Delta
              VariableReference PlantNumber: VariableName=[Cotton].SowingData.Population
              VariableReference Branches: VariableName=[Leaf].BranchNumber
              DivideFunction LAR
                VariableReference TT: VariableName=[Phenology].ThermalTime
                VariableReference Phyllochron: VariableName=[Leaf].Phyllochron
              VariableReference R
                VariableName=[Leaf].DMDemands.Structural.DeltaLAIPotential.LeafGrowthStage.Delta.EmergingLeaves.MultiplyFunction.R
        Constant NReallocationFactor: FixedValue=1
          Memo
            This model assumes that all metabolic and storage N is available for reallocation from senescing leaves.
        MaximumFunction SenescenceRate
          PhaseLookup AgeDrivenSenescenceRate
            PhaseLookupValue Vegetative: Start=Emergence; End=StartFlowering
              Constant DetachmentRate: FixedValue=0
            PhaseLookupValue Reproductive: Start=StartFlowering; End=Maturity
              Memo
                Leaf senescence rate is calculated to ensure that all leaves are senesced by crop maturity.
              MultiplyFunction AgeSenescence
                Constant: FixedValue=0.01
                DivideFunction Rate
                  VariableReference TT: VariableName=[Phenology].ThermalTime
                  SubtractFunction TTRemaining
                    ExpressionFunction TTRequired
                      Expression=[Phenology].EarlyFlowering.Target + [Phenology].BollFilling.Target + [Phenology].Maturing.Target
                    ExpressionFunction TTComplete
                      Expression=[Phenology].EarlyFlowering.ProgressThroughPhase + [Phenology].BollFilling.ProgressThroughPhase + [Phenology].Maturing.ProgressThroughPhase
        Constant DetachmentRate: FixedValue=0.05; Units=/d
        DivideFunction InitialWt
          MultiplyFunction Initial
            Memo
              Changed initial leaf area from 0.00035 cm2 to 0.0006 cm2

              Based on:

              * *Reddy, K.R., Hodges, H.F. and McKinion, J.M., 1997. Modeling temperature effects on cotton internode and leaf growth. Crop Sci., 37(2): 503-509.* **(Fig. 5)**
              * *Lane, H.C. and Hesketh, J.D., 1977. Cotyledon Photosynthesis During Seedling Growth of Cotton, Gossypium hirsutum L. Am. J. Bot., 64(6): 786-790.* **(Fig. 1)**
            Constant AreaPerPlant: FixedValue=0.0006
            VariableReference Population: VariableName=[Plant].SowingData.Population
          VariableReference SLA: VariableName=[Leaf].SpecificArea
        MultiplyFunction LAIDead
          VariableReference SLA: VariableName=[Leaf].SpecificArea
          VariableReference LeafDeadWt: VariableName=[Leaf].Dead.Wt
        LinearInterpolationFunction MaximumNConc
          Memo
            These values have been fitted to the data from Tim Weavers Nitrogen trial. Value for Phenology.Stage 3 estimated.

            Y values were all from the N300 treatment

            Cotton.Phenology.Stage | Cotton.Phenology.CurrentStageName
            -----------------------|----------------------------------
            1 | Sowing
            2 | Germination
            3 | Emergence
            4 | StartSquaring
            5 | StartFlowering
            6 | Cutout
            7 | StartBollFilling
            8 | StartOpenBolls
            9 | Maturity
          XYPairs: X=[3, 5, 8]; Y=[0.06, 0.05, 0.03]
          VariableReference XValue: VariableName=[Phenology].Stage
        VariableReference CriticalNConc: VariableName=[Leaf].MaximumNConc
        Constant MinimumNConc: FixedValue=0.02
          Memo
            Tim Weavers Nitrogen trial

            N concentration at maturity for N0 treatment = 0.025
        Constant MaintenanceRespiration: FixedValue=0; Units=0-1
        Constant DMConversionEfficiency: FixedValue=1; Units=0-1
        BiomassRemoval BiomassRemovalDefaults: HarvestFractionLiveToRemove=0; HarvestFractionDeadToRemove=0; HarvestFractionLiveToResidue=1; HarvestFractionDeadToResidue=1
        Constant NRetranslocationFactor: FixedValue=0.5
        Constant DMReallocationFactor: FixedValue=0
        Constant DMRetranslocationFactor: FixedValue=0.5
        Constant RemobilisationCost: FixedValue=0
        Constant CarbonConcentration: FixedValue=0.4
        NutrientDemandFunctions DMDemands
          DivideFunction Structural
            PhaseLookup DeltaLAIPotential
              Memo
                16/05/2023:

                Phase runs from emergence to maturity -- veg and repr concurrent!

                ================================================================================================================

                ***Add "Vegetative phase"? Since leaf area not affected much by water stress the first couple of weeks?***

                WaterStress not working correctly?

                =======================================

                DeltaLAI describes the LAI variation over the cycle and is calculated using the Area of Largest Leaf, relative leaf area, plant number, branch number and leaf appearance rate (thermal time/phyllochron).

                Include **TemperatureFactor**?

                =======================================

                Higher density --> more rapid early leaf growth (see row spacing trial DDRF)

                =======================================

                Excess water can be detrimental between cut-out and maturity. Vegetative growth can be
                restarted if water deficit is reduced by rain

                *Yeates, S.J., 2014. Tech Bulletin Water stress: effect on cotton physiology.*
              PhaseLookupValue LeafGrowthStage: Start=Emergence; End=Maturity
                MultiplyFunction Delta
                  VariableReference AreaLargestLeaf: VariableName=[Leaf].AreaLargestLeaf
                  LinearInterpolationFunction RelativeArea
                    Memo
                      Crop Phases:

                      Phase number | Phase
                      -------------|------
                      1 | Sowing
                      2 | Germination
                      3 | Emergence
                      4 | StartSquaring
                      5 | StartFlowering
                      6 | Cutout
                      7 | StartBollFilling
                      8 | StartOpenBolls
                      9 | Maturity
                      10 | HarvestRipe

                      Phase number | Rel.LAI
                      -----------|---------
                      4 | 0.2
                      5 | 0.7
                      6 | 1
                    XYPairs: X=[5, 6, 8]; Y=[0.1, 1, 1]
                    VariableReference XValue: VariableName=[Phenology].Stage
                  AddFunction EmergingLeaves
                    Constant: FixedValue=1
                    MultiplyFunction
                      VariableReference Branches: VariableName=[Leaf].BranchNumber
                      LinearInterpolationFunction R
                        Memo
                          **REDUCE TO 0.2? SEE CALCULATIONS FOR DDRFRS1000 IN COTTONOBSERVED DATASHEET**

                          **0.3 for RS trial?!**

                          FROM:

                          * *Hearn, A.B. and Da Roza, G.D., 1985. A simple model for crop management applications for cotton (Gossypium hirsutum L.). Field Crops Res., 12: 49–69.*

                          *R* is the ratio of the rate of mainstem node production to the rate of fruiting branch node production.

                          "For any variety, there is a constant ratio between the rate at which nodes (and thus new fruiting branches) appear on the main stem and the rate at which new fruiting sites appear along a fruiting branch (Hearn, 1969; Mutsaers, 1983)."

                          Check also the following references:

                          1. *Jackson, B.S., Arkin, G.F. and Hearn, A.B., 1988. The Cotton Simulation Model "COTTAM": Fruiting Model Calibration and Testing. American Society of Agricultural Engineers, 31(3): 846–854.*
                          2. *Hearn, A.B., 1969. Growth and performance of cotton in a desert environment: I. Morphological development of the crop. The Journal of Agricultural Science, 73(1): 65-74.*
                          3. *Mutsaers, H.J.W., 1983. Leaf Growth in Cotton (Gossyp/um hirsutum L.) 1. Growth in Area of Main-stem and Sympodial Leaves. Ann. Bot., 51: 503-520.*
                        XYPairs: X=[4, 5, 6]; Y=[0.5, 0.5, 0]
                        VariableReference XValue: VariableName=[Phenology].Stage
                  VariableReference PlantNumber: VariableName=[Cotton].SowingData.Population
                  DivideFunction LAR
                    VariableReference TT: VariableName=[Phenology].ThermalTime
                    VariableReference Phyllochron: VariableName=[Leaf].Phyllochron
                  LinearInterpolationFunction Cover_response
                    Memo
                      Move this to SenescenceRate function?
                    XYPairs: X=[0, 0.4, 0.5, 1]; Y=[1, 1, 1, 0.2]
                    VariableReference XValue: VariableName=[leaf].CoverGreen
            VariableReference SLA: VariableName=[Leaf].SpecificArea
            Memo
              Growth in leaf area is used to calculate the leaf dry matter demand. The same was assumed in the original crop models in APSIM. Further model development can be taken once new experimental data for metabolic, structural and storage forms are provided.
            Memo Memo1
              DeltaLAI describes the LAI variation over the cycle and is calculated using the Area of Largest Leaf, relative leaf area, plant number, branch number and leaf appearance rate (thermal time/phyllochron).
          Constant Storage: FixedValue=0
          Constant Metabolic: FixedValue=0
          Constant QStructuralPriority: FixedValue=1
          Constant QMetabolicPriority: FixedValue=1
          Constant QStoragePriority: FixedValue=1
        NutrientDemandFunctions NDemands
          MultiplyFunction Structural
            VariableReference MinNconc: VariableName=[Leaf].minimumNconc
            VariableReference PotentialDMAllocation: VariableName=[Leaf].potentialDMAllocation.Structural
          MultiplyFunction Metabolic
            SubtractFunction MetabolicNconc
              VariableReference CritNconc: VariableName=[Leaf].criticalNConc
              VariableReference MinNconc: VariableName=[Leaf].minimumNconc
            VariableReference PotentialDMAllocation: VariableName=[Leaf].potentialDMAllocation.Structural
          StorageNDemandFunction Storage
            Constant NitrogenDemandSwitch: FixedValue=1
            VariableReference MaxNconc: VariableName=[Leaf].maximumNconc
          Constant QStructuralPriority: FixedValue=1
          Constant QMetabolicPriority: FixedValue=1
          Constant QStoragePriority: FixedValue=1
        LinearInterpolationFunction FrostFraction
          XYPairs: X=[-4, 4]; Y=[1, 0]
          VariableReference XValue: VariableName=[Weather].MinT
        Constant SpecificArea: FixedValue=0.014
          Memo
            Is there a relationship with RUE so can make this more dynamic? Or with CO2?

            "The relationship between RUE (Radiation Use Efficiency) and specific leaf area is that RUE is positively correlated with specific leaf area (SLA)"

            https://www.bing.com/search?q=relationship+between+RUE+and+specific+leaf+area%3F&qs=n&form=QBRE&sp=-1&ghc=1&lq=0&pq=relationship+between+rue+and+specific+leaf+area&sc=10-47&sk=&cvid=251D1C07D98845E5AF84991C12EEA22C&ghsh=0&ghacc=0&ghpl=
        Constant AreaLargestLeaf: FixedValue=0.016
        DivideFunction SpecificAreaCanopy
          VariableReference LAI: VariableName=[Leaf].Area
          VariableReference LeafWt: VariableName=[Leaf].Live.Wt
      GenericOrgan Stem: IsAboveGround=true
        Memo
          Check N dynamics over time in cotton and partitioning and storage
        Constant NReallocationFactor: FixedValue=1
        Constant NRetranslocationFactor: FixedValue=0.5
        PhaseLookup DMRetranslocationFactor
          PhaseLookupValue Vegetative: Start=Emergence; End=Cutout
            Constant RetranslocationFactor: FixedValue=0
          PhaseLookupValue BollFilling: Start=Cutout; End=Maturity
            Constant RetranslocationFactor: FixedValue=0.2
        LinearInterpolationFunction MaximumNConc
          Memo
            From Tim Weavers N trial data
          XYPairs: X=[3, 6, 7, 8]; Y=[0.03, 0.017, 0.011, 0.01]
          VariableReference XValue: VariableName=[Phenology].Stage
        Constant MinimumNConc: FixedValue=0.007
        VariableReference CriticalNConc: VariableName=[Stem].MinimumNConc
        PhaseLookupValue NitrogenDemandSwitch: Start=Emergence; End=Cutout
          Memo
            There is no evidence of stem N storage during grain filling. Also, there is no stem structural growth during this time.
          Constant: FixedValue=1
        BiomassRemoval BiomassRemovalDefaults: HarvestFractionLiveToRemove=0; HarvestFractionDeadToRemove=0; HarvestFractionLiveToResidue=1; HarvestFractionDeadToResidue=1
        PhaseLookup SenescenceRate
          PhaseLookupValue Vegetative: Start=Emergence; End=Cutout
            Constant Rate: FixedValue=0
          PhaseLookupValue PostCutout: Start=Cutout; End=Maturity
            MinimumFunction Rate
              DivideFunction Fraction
                VariableReference TT: VariableName=[Phenology].ThermalTime
                SubtractFunction TTRemaining
                  ExpressionFunction PostCanopyTT: Expression=[Phenology].BollFilling.Target+[Phenology].Maturing.Target
                  ExpressionFunction PostCanopyTTComplete
                    Expression=[Phenology].BollFilling.ProgressThroughPhase+[Phenology].Maturing.ProgressThroughPhase
              Constant One: FixedValue=1
        Constant DetachmentRateFunction: FixedValue=0; Units=/d
        Constant MaintenanceRespirationFunction: FixedValue=0; Units=0-1
        Constant DMConversionEfficiency: FixedValue=1; Units=0-1
        Constant DMReallocationFactor: FixedValue=1
        Constant RemobilisationCost: FixedValue=0
        Constant CarbonConcentration: FixedValue=0.4
        NutrientDemandFunctions DMDemands
          MultiplyFunction Structural
            PhaseLookup Fraction
              Memo
                WHAT DOES THIS FRACTION MEAN?
              PhaseLookupValue StemGrowthPhase: Start=Emergence; End=Maturity
                Constant Fraction: FixedValue=0.7
            VariableReference DMDemand: VariableName=[Stem].PotentialGrowth
          Constant Metabolic: FixedValue=0
          MultiplyFunction Storage
            VariableReference DMDemand: VariableName=[Stem].PotentialGrowth
            SubtractFunction StorageFraction
              Constant One: FixedValue=1
              VariableReference StructuralFraction: VariableName=[Stem].DMDemands.Structural.Fraction
          Constant QStructuralPriority: FixedValue=1
          Constant QMetabolicPriority: FixedValue=1
          Constant QStoragePriority: FixedValue=1
        NutrientDemandFunctions NDemands
          MultiplyFunction Structural
            VariableReference MinNconc: VariableName=[Stem].minimumNconc
            VariableReference PotentialDMAllocation: VariableName=[Stem].potentialDMAllocation.Structural
          MultiplyFunction Metabolic
            SubtractFunction MetabolicNconc
              VariableReference CritNconc: VariableName=[Stem].criticalNConc
              VariableReference MinNconc: VariableName=[Stem].minimumNconc
            VariableReference PotentialDMAllocation: VariableName=[Stem].potentialDMAllocation.Structural
          StorageNDemandFunction Storage
            VariableReference NitrogenDemandSwitch: VariableName=[Stem].nitrogenDemandSwitch
            VariableReference MaxNconc: VariableName=[Stem].maximumNconc
          Constant QStructuralPriority: FixedValue=1
          Constant QMetabolicPriority: FixedValue=1
          Constant QStoragePriority: FixedValue=1
        PartitionFractionDemandFunction PotentialGrowth
          PhaseLookup PartitionFraction
            PhaseLookupValue StemGrowthPhase: Start=Emergence; End=Maturity
              Constant StemFraction: FixedValue=0.37
        RetranslocateNonStructural RetranslocateNitrogen
        NutrientPoolFunctions InitialWt
          Constant Structural: FixedValue=0; Units=g/m^2
          Constant Metabolic: FixedValue=0
          Constant Storage: FixedValue=0
        Constant Photosynthesis: FixedValue=0
        VariableReference initialNConcFunction: VariableName=[Stem].MinimumNConc
      GenericOrgan Bur: IsAboveGround=true
        Memo
          **REVISE BUR N CONC!!!!!**
        NutrientDemandFunctions DMDemands
          MultiplyFunction Structural
            PhaseLookup DMDemandFunction
              PhaseLookupValue BurDevelopment: Start=StartFlowering; End=Maturity
                MultiplyFunction HIDemand
                  VariableReference AboveGroundWt: VariableName=[AboveGround].Wt
                  MinimumFunction HIIncrease
                    MultiplyFunction DailyRate
                      VariableReference HIIncrease: VariableName=[Boll].DailyHIIncrease
                      VariableReference BollBurFraction: VariableName=[Boll].BurFraction
                    MaximumFunction HIRemaining
                      SubtractFunction Calculation
                        VariableReference PotentialHI: VariableName=[Bur].PotentialHarvestIndex
                        VariableReference CurrentHI: VariableName=[Bur].HarvestIndex
                      Constant Zero: FixedValue=0
            Constant StructuralFraction: FixedValue=1
          Constant Metabolic: FixedValue=0
          StorageDMDemandFunction Storage
            SubtractFunction StorageFraction
              Constant One: FixedValue=1
              VariableReference StructuralFraction: VariableName=[Bur].DMDemands.Structural.StructuralFraction
          Constant QStructuralPriority: FixedValue=1
          Constant QMetabolicPriority: FixedValue=1
          Constant QStoragePriority: FixedValue=1
        NutrientDemandFunctions NDemands
          MultiplyFunction Structural
            VariableReference MinNconc: VariableName=[Bur].minimumNconc
            VariableReference PotentialDMAllocation: VariableName=[Bur].potentialDMAllocation.Structural
          StorageNDemandFunction Storage
            VariableReference NitrogenDemandSwitch: VariableName=[Bur].nitrogenDemandSwitch
            VariableReference MaxNconc: VariableName=[Bur].maximumNconc
          Constant Metabolic: FixedValue=0
          Constant QStructuralPriority: FixedValue=1
          Constant QMetabolicPriority: FixedValue=1
          Constant QStoragePriority: FixedValue=1
        RetranslocateNonStructural RetranslocateNitrogen
        PhaseLookupValue NitrogenDemandSwitch: Start=StartFlowering; End=Cutout
          Constant: FixedValue=1
        Constant MaximumNConc: FixedValue=0.0358
          Memo
            **12/07/2023: MinNConc 0.01; MaxNConc 0.045**

            Values from:

            Boquet, D.J. and Breitenbeck, G.A., 2000. Nitrogen Rate Effect on Partitioning of Nitrogen and Dry Matter by Cotton. Crop Sci., 40: 1685-1693.

            Min: 0.011

            Max: 0.020

            **17/07/2023:** Boquet & Breitenbeck 2000, EEB values (N values at cutout): MinNConc: 0.0194, MaxNConc: 0.0358
        Constant MinimumNConc: FixedValue=0.0194
        VariableReference CriticalNConc: VariableName=[Bur].MinimumNConc
        Constant NReallocationFactor: FixedValue=1
        Constant NRetranslocationFactor: FixedValue=0.5
        Constant DMRetranslocationFactor: FixedValue=0.1
        BiomassRemoval BiomassRemovalDefaults: HarvestFractionLiveToRemove=0; HarvestFractionDeadToRemove=0; HarvestFractionLiveToResidue=1; HarvestFractionDeadToResidue=1
        PhaseLookup SenescenceRate
          PhaseLookupValue ReproductivePhase: Start=Cutout; End=Maturity
            MinimumFunction Rate
              DivideFunction Fraction
                VariableReference TT: VariableName=[Phenology].ThermalTime
                SubtractFunction TTRemaining
                  ExpressionFunction ReproductiveTT: Expression=[Phenology].BollFilling.Target+[Phenology].Maturing.Target
                  ExpressionFunction ReproductiveTTComplete
                    Expression=[Phenology].BollFilling.ProgressThroughPhase+[Phenology].Maturing.ProgressThroughPhase
              Constant One: FixedValue=1
        Constant DetachmentRateFunction: FixedValue=0; Units=/d
        Constant MaintenanceRespirationFunction: FixedValue=0; Units=0-1
        Constant DMConversionEfficiency: FixedValue=1; Units=0-1
        Constant DMReallocationFactor: FixedValue=0
        Constant RemobilisationCost: FixedValue=0
        Constant CarbonConcentration: FixedValue=0.4
        MultiplyFunction PotentialHarvestIndex
          Memo
            11/07/2023: SeedFraction 0.45 at Maturity (0.04 and 0.055 N Conc) and 0.58 at HarvestRipe (0.033 and 0.043 N conc)

            If run model to Maturity, remove RipeningDuration from FillingDuration and DMDemandFunction
          VariableReference BollHarvestIndex: VariableName=[Boll].PotentialHarvestIndex
          VariableReference BurFraction: VariableName=[Boll].BurFraction
        NutrientPoolFunctions InitialWt: same as Replacements.Cotton.Stem.InitialWt
        VariableReference initialNConcFunction: VariableName=[Bur].MinimumNConc
        Constant Photosynthesis: FixedValue=0
        DivideFunction HarvestIndex
          VariableReference BurWt: VariableName=[Bur].Wt
          VariableReference AboveGroundWt: VariableName=[AboveGround].Wt
      ReproductiveOrgan Seed: GrowthRespiration=0; MaintenanceRespiration=0
        Biomass Live
        Biomass Dead
        PhaseLookup DMDemandFunction
          PhaseLookupValue BollFilling: Start=StartFlowering; End=Maturity
            MultiplyFunction HIDemand
              VariableReference AboveGroundWt: VariableName=[AboveGround].Wt
              MinimumFunction HIIncrease
                MultiplyFunction DailyRate
                  VariableReference HIIncrease: VariableName=[Boll].DailyHIIncrease
                  VariableReference BollSeedFraction: VariableName=[Boll].SeedFraction
                MaximumFunction HIRemaining
                  SubtractFunction Calculation
                    VariableReference PotentialHI: VariableName=[Seed].PotentialHarvestIndex
                    VariableReference CurrentHI: VariableName=[Seed].HarvestIndex
                  Constant Zero: FixedValue=0
        Constant MaximumNConc: FixedValue=0.04
          Memo
            10/07/2023: Values from: Using seed nitrogen concentration to estimate crop N use-efficiency in
            high-yielding irrigated cotton - Ian J. Rochester

            Values from:

            Sadras, V.O. and Wilson, L.J., 1997. Nitrogen accumulation and partitioning in shoots of cotton plants infested with two-spotted spider mites. Aust. J. Agric. Res., 48: 525-533.

            Min: 0.040

            Max: 0.055

            --> **Boquet, D.J. and Breitenbeck, G.A., 2000. Nitrogen Rate Effect on Partitioning of Nitrogen and Dry Matter by Cotton. Crop Sci., 40: 1685-1693.**

            Min: 0.033

            Max: 0.043

            Snider, J., et al. (2021). Chapter 22. Cotton. Crop Physiology. Case Histories for Major Crops. V. O. Sadras and D. F. Calderini: 715-746.

            39-55%
        Constant MinimumNConc: FixedValue=0.03
        Constant WaterContent: FixedValue=0.12
        MultiplyFunction NFillingRate
          VariableReference NConc: VariableName=[Seed].MaximumNConc
          VariableReference DMDemand: VariableName=[Seed].DMDemandFunction
          VariableReference DMConversionEfficiency: VariableName=[Seed].DMConversionEfficiency
        BiomassRemoval BiomassRemovalDefaults: HarvestFractionLiveToRemove=1; HarvestFractionDeadToRemove=1; HarvestFractionLiveToResidue=0; HarvestFractionDeadToResidue=0
        Constant DMConversionEfficiency: FixedValue=0.89
        Constant RemobilisationCost: FixedValue=0
        Constant CarbonConcentration: FixedValue=0.4
        DivideFunction HarvestIndex
          VariableReference SeedWt: VariableName=[Seed].Wt
          VariableReference AboveGroundWt: VariableName=[AboveGround].Wt
        MultiplyFunction PotentialHarvestIndex
          Memo
            11/07/2023: SeedFraction 0.45 at Maturity (0.04 and 0.055 N Conc) and 0.58 at HarvestRipe (0.033 and 0.043 N conc)

            If run model to Maturity, remove RipeningDuration from FillingDuration and DMDemandFunction
          VariableReference BollHarvestIndex: VariableName=[Boll].PotentialHarvestIndex
          VariableReference SeedFraction: VariableName=[Boll].SeedFraction
        Constant MaximumPotentialBollSize: FixedValue=0
          Memo
            This parameter is not used.  Grain growth is calculated from harvest index increase.
        Constant NumberFunction: FixedValue=0
          Memo
            Grain number is not estimated by this model.
        NutrientPoolFunctions DMDemandPriorityFactors
          Constant Structural: FixedValue=1
          Constant Metabolic: FixedValue=1
          Constant Storage: FixedValue=1
        NutrientPoolFunctions NDemandPriorityFactors: same as Replacements.Cotton.Seed.DMDemandPriorityFactors
      ReproductiveOrgan Lint: GrowthRespiration=0; MaintenanceRespiration=0
        Biomass Live
        Biomass Dead
        PhaseLookup DMDemandFunction
          PhaseLookupValue BollFilling: Start=StartFlowering; End=Maturity
            MultiplyFunction HIDemand
              VariableReference AboveGroundWt: VariableName=[AboveGround].Wt
              MinimumFunction HIIncrease
                MultiplyFunction DailyRate
                  VariableReference HIIncrease: VariableName=[Boll].DailyHIIncrease
                  VariableReference BollBurFraction: VariableName=[Boll].LintFraction
                MaximumFunction HIRemaining
                  SubtractFunction Calculation
                    VariableReference PotentialHI: VariableName=[Lint].PotentialHarvestIndex
                    VariableReference CurrentHI: VariableName=[Lint].HarvestIndex
                  Constant Zero: FixedValue=0
        Constant MaximumNConc: FixedValue=0.0031
          Memo
            Values from:

            Sadras, V.O. and Wilson, L.J., 1997. Nitrogen accumulation and partitioning in shoots of cotton plants infested with two-spotted spider mites. Aust. J. Agric. Res., 48: 525-533.

            Min: 0.0020

            Max: 0.0037

            --> **Boquet, D.J. and Breitenbeck, G.A., 2000. Nitrogen Rate Effect on Partitioning of Nitrogen and Dry Matter by Cotton. Crop Sci., 40: 1685-1693.**

            Min: 0.0022

            Max: 0.0031

            Snider, J., et al. (2021). Chapter 22. Cotton. Crop Physiology. Case Histories for Major Crops. V. O. Sadras and D. F. Calderini: 715-746.

            2-3.7%
        Constant MinimumNConc: FixedValue=0.0022
        Constant WaterContent: FixedValue=0.07
        MultiplyFunction NFillingRate
          VariableReference NConc: VariableName=[Lint].MaximumNConc
          VariableReference DMDemand: VariableName=[Lint].DMDemandFunction
          VariableReference DMConversionEfficiency: VariableName=[Lint].DMConversionEfficiency
        BiomassRemoval BiomassRemovalDefaults: HarvestFractionLiveToRemove=1; HarvestFractionDeadToRemove=1; HarvestFractionLiveToResidue=0; HarvestFractionDeadToResidue=0
        Constant DMConversionEfficiency: FixedValue=1
        Constant RemobilisationCost: FixedValue=0
        Constant CarbonConcentration: FixedValue=0.4
        DivideFunction HarvestIndex
          VariableReference LintWt: VariableName=[Lint].Wt
          VariableReference AboveGroundWt: VariableName=[AboveGround].Wt
        MultiplyFunction PotentialHarvestIndex
          Memo
            11/07/2023: LintFraction 0.30 at Maturity and 0.42 at HarvestRipe

            If run model to Maturity, remove RipeningDuration from FillingDuration and DMDemandFunction

            13/06/2023: Changed LintFraction from 0.30 to 0.25
          VariableReference BollHarvestIndex: VariableName=[Boll].PotentialHarvestIndex
          VariableReference LintFraction: VariableName=[Boll].LintFraction
        Constant MaximumPotentialBollSize: FixedValue=0
          Memo
            This parameter is not used.  Grain growth is calculated from harvest index increase.
        Constant NumberFunction: FixedValue=0
          Memo
            Grain number is not estimated by this model.
        NutrientPoolFunctions DMDemandPriorityFactors: same as Replacements.Cotton.Seed.DMDemandPriorityFactors
        NutrientPoolFunctions NDemandPriorityFactors: same as Replacements.Cotton.Seed.DMDemandPriorityFactors
        DivideFunction Bales
          VariableReference LintWt: VariableName=[Lint].Wt
          Constant BaleWT: FixedValue=22.7; Units=kg
      Root: GrowthRespiration=0; MaintenanceRespiration=0
        Memo
          Include taproot? See crop model ***PlantainForage***

          *Snider, J., Bange, M. and Heitholt, J., 2021. Chapter 22. Cotton. In: V.O. Sadras and D.F. Calderini (Editors), Crop Physiology. Case Histories for Major Crops, pp. 715-746.*

          from EMERGENCE:

          During this time, the cotton plant exhibits rapid root growth. The primary root may be as much as 25-cm deep by the time the cotyledons unfold, and early season taproot growth proceeds at rates up to 6 cm per day under optimal
          conditions (Oosterhuis, 1990; Ritchie et al., 2007; Snider and Oosterhuis, 2015).

          CANOPY DEVELOPMENT:

          Root growth also continues during early canopy and square development. In fact, the onset of flowering represents a shift in source-sink relations towards greater reproductive growth and a significant reduction in root growth.

          Thus, crop growth before flowering is critical for developing a well-established root system and sufficient canopy to support growth and yield.

          Cotton root growth is rapid during the early part of the season and acts as the major sink for photosynthate until flowering and early boll development.

          ============================================================================================================================================

          Temperature effect on root growth?

          From:

          * Reddy et al. 1991a. Temperature effects on growth and development of cotton during the fruiting period. Agron. J. 83:211-217.
          * Hodges, H.F., Reddy, K.R., McKinion, J.M. and Reddy, V.R., 1993. Temperature Effects on Cotton, Mississippi State University, Mississippi, USA.

          Early in the season nearly 50% of the plants dry matter is found in the roots, but as the season progreses, the percentage dry matter in the root decreases. At maturity there is only about 10% in roots (Reddy 1991a)

          From:

          Hodges, H.F., Reddy, K.R., McKinion, J.M. and Reddy, V.R., 1993. Temperature Effects on Cotton, Mississippi State University, Mississippi, USA.

          Roots DM Partitioning:

          **CHECK THIS!!!!** Assuming, StartSquaring = ~20DAE = 40%, StartFlowering = ~50DAE = 30% and Cutout = ~80DAE = 20%
        RootShapeCylinder RootShape
        MultiplyFunction RootFrontVelocity
          Memo
            Add temp factor?

            See Conaty's PhD page 39
          PhaseLookup PotentialRootFrontVelocity
            PhaseLookupValue PreEmergence: Start=Germination; End=Emergence
              Constant Function: FixedValue=5
            PhaseLookupValue early: Start=Emergence; End=Cutout
              Constant Function: FixedValue=23
            PhaseLookupValue late: Start=Cutout; End=Maturity
              Constant Function: FixedValue=5
          LinearInterpolationFunction WaterFactor (disabled)
            SoilWaterScale
            XYPairs: X=[0, 0.25, 1]; Y=[1, 1, 1]
            VariableReference XValue: VariableName=[SoilWaterScale]
          LinearInterpolationFunction AFPSFactor (disabled)
            XYPairs: X=[0, 0.03, 1]; Y=[0, 1, 1]
            VariableReference XValue: VariableName=[Root].AirFilledPoreSpace
        Constant MaximumRootDepth: FixedValue=1000000
        Constant KLModifier: FixedValue=1; Units=0-1
          Memo
            No modification to water extraction rate is assumed in this model.
        LinearInterpolationFunction MaxDailyNUptake
          XYPairs: X=[0, 5]; Y=[6, 6]
          VariableReference XValue: VariableName=[Leaf].LAI
        Constant SenescenceRate: FixedValue=0.005; Units=/d
        Constant MaximumNConc: FixedValue=0.01
        Constant MinimumNConc: FixedValue=0.005
        PhaseLookupValue NitrogenDemandSwitch: Start=Emergence; End=Cutout
          Constant: FixedValue=1
        Constant KNO3: FixedValue=0.02
        Constant KNH4: FixedValue=0
          Memo
            The current model version considers only NO3 uptake but NH4 option can be activated by the user . We do not expect activation of NH4 to change total plant N uptake because the nitrification rate (conversion of NH4 to NO3) is very fast in the model. In the future we will re-valuate this.
        BiomassRemoval BiomassRemovalDefaults: HarvestFractionLiveToRemove=0; HarvestFractionDeadToRemove=0; HarvestFractionLiveToResidue=0.2; HarvestFractionDeadToResidue=0
        LinearInterpolationFunction NUptakeSWFactor
          XYPairs: X=[0, 1]; Y=[0, 1]
          VariableReference XValue: VariableName=[Root].RWC
        Constant SpecificRootLength: FixedValue=60; Units=m/g
          Memo
            Specific root length default from OZCOT = 60000 mm/g
        Constant DMConversionEfficiency: FixedValue=1
        Constant MaintenanceRespirationFunction: FixedValue=1
        Constant RemobilisationCost: FixedValue=0
        Constant CarbonConcentration: FixedValue=0.4
        NutrientDemandFunctions DMDemands
          MultiplyFunction Structural
            PartitionFractionDemandFunction DMDemandFunction
              Memo
                Default:

                Preflowering: 0.2

                Flowering to cutout: 0.1
              LinearInterpolationFunction PartitionFraction
                Memo
                  From:

                  Hodges, H.F., Reddy, K.R., McKinion, J.M. and Reddy, V.R., 1993. Temperature Effects on Cotton, Mississippi State University, Mississippi, USA:

                  *"Emerging seedlings partitioned nearly 50% of their dry weight into roots, whereas mature cotton plants had only 5 to 10% of their dry weight in roots."*

                  Assuming:

                  StartSquaring = 20DAE = 40%
                  StartFlowering = 50DAE = 30%
                  Cutout = 80DAE = 20%

                  **PHENOLOGY**

                  The following crop phases are distinguished:

                  Phase number | Stage
                  -------------|------------
                  1 |Sowing
                  2 |Germination
                  3 |Emergence
                  4 |StartSquaring
                  5 |StartFlowering
                  6 |Cutout
                  7 |StartBollFilling
                  8 |StartOpenBolls
                  9 |Maturity
                  10|HarvestRipe
                XYPairs: X=[3, 8]; Y=[0.5, 0.05]
                VariableReference XValue: VariableName=[Phenology].Stage
            Constant StructuralFraction: FixedValue=1
          Constant Metabolic: FixedValue=0
          StorageDMDemandFunction Storage
            SubtractFunction StorageFraction
              Constant One: FixedValue=1
              VariableReference StructuralFraction: VariableName=[Root].DMDemands.Structural.StructuralFraction
          Constant QStructuralPriority: FixedValue=1
          Constant QMetabolicPriority: FixedValue=1
          Constant QStoragePriority: FixedValue=1
        NutrientDemandFunctions NDemands
          MultiplyFunction Structural
            VariableReference MinNconc: VariableName=[Root].minimumNconc
            VariableReference PotentialDMAllocation: VariableName=[Root].potentialDMAllocation.Structural
          MultiplyFunction Metabolic
            SubtractFunction MetabolicNconc
              VariableReference CritNconc: VariableName=[Root].criticalNConc
              VariableReference MinNconc: VariableName=[Root].minimumNconc
            VariableReference PotentialDMAllocation: VariableName=[Root].potentialDMAllocation.Structural
          StorageNDemandFunction Storage
            VariableReference NitrogenDemandSwitch: VariableName=[Root].nitrogenDemandSwitch
            VariableReference MaxNconc: VariableName=[Root].maximumNconc
          Constant QStructuralPriority: FixedValue=1
          Constant QMetabolicPriority: FixedValue=1
          Constant QStoragePriority: FixedValue=1
        VariableReference CriticalNConc: VariableName=[Root].MinimumNConc
        NutrientPoolFunctions InitialWt
          Constant Structural: FixedValue=0.2; Units=g/plant
          Constant Metabolic: FixedValue=0
          Constant Storage: FixedValue=0
      CompositeBiomass Boll: OrganNames=[Bur, Seed, Lint]; IncludeLive=true; IncludeDead=true
        Memo
          Boll components develop following an S-curve.

          For DM boll component fractions:

          * Kohel, R. J. and C. R. Benedict (1984). "Year Effects on Partitioning of Dry Matter into Cotton Boll Components." Crop Science 24(2).
          * Pace, P. F., et al. (1999). "Photosynthate and Dry Matter Partitioning in Short‐ and Long‐Season Cotton Cultivars." Crop Science 39(4): 1065-1069.
          * Boquet, D. J. and G. A. Breitenbeck (2000). "Nitrogen Rate Effect on Partitioning of Nitrogen and Dry Matter by Cotton." Crop Science 40: 1685-1693.
          * Makhdum, M. I., et al. (2006). "Dry matter accumulation and partitioning in cotton (Gossypium hirsutum L.) as influenced by potassium fertilization." Biology and Fertility of Soils 43(3): 295-301.
          * Tang, F. and W. Xiao (2013). "Dry Matter Accumulation and Partitioning in Various Fractions of Cotton Bolls." Experimental Agriculture 49(4): 543-555.
          * Pabuayon, I. L. B., et al. (2020). "Dry matter and nutrient partitioning changes for the past 30 years of cotton production." Agronomy Journal 112(5): 4373-4385.
        DivideFunction HarvestIndex
          VariableReference BollWt: VariableName=[Boll].Wt
          VariableReference AboveGroundWt: VariableName=[AboveGround].Wt
        Constant PotentialHarvestIndex: FixedValue=0.7
        Constant BurFraction: FixedValue=0.23
          Memo
            Bur fraction at cutout; approx 0.4

            Kohel, R. J. and C. R. Benedict (1984). "Year Effects on Partitioning of Dry Matter into Cotton Boll Components." Crop Science 24(2).
        Constant SeedFraction: FixedValue=0.47
        Constant LintFraction: FixedValue=0.3
        Constant DailyHIIncrease: FixedValue=0.03
      CompositeBiomass AboveGround: OrganNames=[Leaf, Stem, Bur, Seed, Lint]; IncludeLive=true; IncludeDead=true
      CompositeBiomass AboveGroundLive: OrganNames=[Leaf, Stem, Bur, Seed, Lint]; IncludeLive=true; IncludeDead=false
      CompositeBiomass BelowGround: OrganNames=[Root]; IncludeLive=true; IncludeDead=true
      CompositeBiomass Total: OrganNames=[Leaf, Stem, Bur, Seed, Lint, Root]; IncludeLive=true; IncludeDead=true
      CompositeBiomass TotalLive: OrganNames=[Leaf, Stem, Bur, Seed, Lint, Root]; IncludeLive=true; IncludeDead=false
      CompositeBiomass TotalDead: OrganNames=[Leaf, Stem, Bur, Seed, Lint, Root]; IncludeLive=false; IncludeDead=true
      Constant MortalityRate: FixedValue=0
      Constant SeedMortalityRate: FixedValue=0
      Folder Cultivars
        Cultivar BLUE_Sicot_71B
          Command:
            //[Phenology].Vegetative.Target.SquaringTT.FixedValue = 343 // Bange et al. 2002
            //[Phenology].Squaring.Target.FloweringTT.FixedValue = 584 // Bange et al. 2002
            //[Phenology].Vegetative.Target.SquaringTT.FixedValue = 320
            //[Phenology].Squaring.Target.FloweringTT.FixedValue = 520
            //[Phenology].EarlyFlowering.Target.elseDefaultValue.FixedValue = 380
            //[Phenology].BollFilling.Target.FixedValue = 260
            //[Phenology].Maturing.Target.FixedValue = 200
      MovingAverageFunction WholePlantGrowthRate: NumberOfDays=7; StageToStartMovingAverage=Emergence
        VariableReference DailyRate: VariableName=[Arbitrator].TotalDMFixationSupply
      MovingAverageFunction AboveGroundGrowthRate: NumberOfDays=7; StageToStartMovingAverage=Emergence
        VariableReference DailyRate
          VariableName=[Leaf].Allocated.Wt + [Stem].Allocated.Wt + [Bur].Allocated.Wt + [Seed].Allocated.Wt + [Lint].Allocated.Wt
      MovingAverageFunction PotentialBollGrowthRate: NumberOfDays=7; StageToStartMovingAverage=Emergence
        VariableReference DailyRate
          VariableName=[Bur].DMDemand.Total + [Seed].DMDemand.Total + [Lint].DMDemand.Total
  Folder Validation
    Folder NAR0607
      Simulation NAR0607Ir80
        Memo Phenology stages Observed
          Stage|Date|DAS
          -|-|-
          Sowing|10 Oct 2006|0
          Emergence|19 Oct 2006|9
          Squaring|1 Dec 2006|52
          Flowering|20 Dec 2006|71
          Cutout|3 Feb 2007|116
          OpenBolls|2 Mar 2007|143
          Maturity|22 Mar 2007|163
          HarvestRipe|3 Apr 2007|175
        Memo Notes
          BLUE

          Added two extra rounds of fertilizer application - was not N stressed..

          .Simulations.Replacements.Cotton.Phenology.EarlyFlowering.Target.elseDefaultValue

          =

          460

          ===========================

          16/06/2023:

          * changed initial N concentrations
          * N samples taken on 10/08/2016
          * remove 2 fertilizer applications of 200 kg N/ha
          * change clock start date to 10/10: date of planting?
          * check N stress at boll filling. Was there N stress?
        Memo
          CRDC and Cottoninfo, 2018. NUTRIpak. A practical guide to cotton nutrition, Cotton Research and Development Corporation.

          To achieve high cotton yields, an uptake of about 250 kg N/
          ha is needed. In irrigated crops, most N taken up by the crop
          comes from the surface (0 to 50 cm) soil from where organic
          matter, mineralised N and fertiliser N are commonly located.

          With only one fert application on 2006-08-22 [Fertiliser].Apply(200, Fertiliser.Types.UreaN,10); not even half of this was taken up and this was a high yielding crop!!!!!
        Clock: Start=2006-08-22; End=2007-04-19
        Summary summaryfile
        Weather: FileName=Weatherfiles\Narrabri_2006-07.met
        SoilArbitrator Soil Arbitrator
        MicroClimate: a_interception=0; b_interception=1; c_interception=0; d_interception=0; SoilHeatFluxFraction=0.4; MinimumHeightDiffForNewLayer=0; NightInterceptionFraction=0.5; ReferenceHeight=2
        Zone paddock: Area=1; Slope=0; AspectAngle=0; Altitude=50
          Manager Sowing
            Crop = [Cotton]
            SowDate = 10-oct
            CultivarName = BLUE_Sicot_71B
            SowingDepth = 50
            RowSpacing = 1000
            Population = 11
```csharp
using APSIM.Shared.Utilities;
using Models.Utilities;
using Models.Soils;
using Models.PMF;
using Models.Core;
using System;

namespace Models
{
    [Serializable]
    public class Script : Model
    {
        [Link] Clock Clock;
        [Link] Fertiliser Fertiliser;
        [Link] Summary Summary;
        [Link] Soil Soil;
        
        [Description("Crop")]
        public IPlant Crop { get; set; }

        [Description("Sowing date (d-mmm)")]
        public string SowDate { get; set; }

        [Display(Type = DisplayType.CultivarName)]
        [Description("Cultivar to be sown")]
        public string CultivarName { get; set; }

        [Description("Sowing depth (mm)")]
        public double SowingDepth { get; set; }

        [Description("Row spacing (mm)")]
        public double RowSpacing { get; set; }

        [Description("Plant population (/m2)")]
        public double Population { get; set; }

        [EventSubscribe("DoManagement")]
        private void OnDoManagement(object sender, EventArgs e)
        {
            if (DateUtilities.WithinDates(SowDate, Clock.Today, SowDate))
            {
                Crop.Sow(population: Population, cultivar: CultivarName, depth: SowingDepth, rowSpacing: RowSpacing);    
            }
        }
    }
}
```
          Fertiliser
          Operations FertiliserEvents
            2006-08-22  [Fertiliser].Apply(200, Fertiliser.Types.UreaN,10);
          Irrigation
          Manager AutomaticIrrigation
            allowIrrigation = True
            seasonStart = 4-Dec
            seasonEnd = 16-Mar
            seasonsAllocation = 10000
            triggerDeficit = 80
            targetDeficit = 95
            returndays = 3
            maximumAmount = 45
            depthPAWC = 1300
```csharp
using Newtonsoft.Json;
using APSIM.Shared.Utilities;
using System.Xml.Serialization;
using Models.Soils;
using Models.PMF;
using Models.Core;
using System;
using System.Linq;
using Models.Interfaces;



        
namespace Models
{
    [Serializable] 
    [System.Xml.Serialization.XmlInclude(typeof(Model))]
    public class Script : Model
    {
        [Link] private ISummary summary;
        [Link] private Irrigation Irrigation;
        [Link] private Clock Clock;
        [Link] private Soil Soil;
        [Link(IsOptional = true)] private IPlant existingCrop;
        private DateTime StartDate;
        private DateTime EndDate;
        private double TopDUL;
        private double TopLL;
        private int nLayers;
        [Link]
        private IPhysical soilPhysical;
        [Link]
        private ISoilWater waterBalance;
        //Communication to other modules
       
        //User inputs from properties tab
        [Description("Turn irrigation on?")]
        public bool allowIrrigation { get; set; }
        [Description("Start of irrigation season (dd-MMM)")]
        public string seasonStart { get; set; }
        [Description("End of irrigation season (dd-MMM)")]
        public string seasonEnd { get; set; }
        [Description("Season allocation (mm)")]
        public double seasonsAllocation { get; set; }
        [Description("Deficit to trigger irrigation (% PAWC)")]
        public double triggerDeficit { get; set; }
        [Description("Deficit to stop irrigaton (% PAWC)")]
        public double targetDeficit { get; set; }
        [Description("Minimum days for irrigation to return")]
        public double returndays { get; set; }
        [Description("Maximum irrigation application (mm/day)")]
        public double maximumAmount { get; set; }
        [Description("Depth to calculate PAWC (mm)")]
        public double depthPAWC { get; set; }

        //Class members
        [JsonIgnore] public double TopSWdeficit { get; set; }
        [JsonIgnore] public double TopSWC { get; set; }
        [JsonIgnore] public double DaysSinceIrrigation { get; set; }
        [JsonIgnore] public double AmountToApply { get; set; }
        [JsonIgnore] public double SeasonAppliedAmount { get; set; }
        
        private bool IrrigationIsAllowed { get; set; }
        private bool SeasonIsOpen { get; set; }
        private bool CropIsActive { get; set; }
        private bool IrrigatorIsAvailable { get; set; }
        private bool SoilIsDry { get; set; }

    
        //Calculate static soil variables
        [EventSubscribe("StartOfSimulation")]
        private void OnStartOfSimulation(object sender, EventArgs e)
        {   
            //Set the season dates
            StartDate = DateTime.Parse(seasonStart + "-" + Clock.Today.Year.ToString());
            EndDate = DateTime.Parse(seasonEnd + "-" + Clock.Today.Year.ToString());
            
            //Can we irrigate at all?
            IrrigationIsAllowed = false; 
            if (allowIrrigation)
                IrrigationIsAllowed = true; 

            //Calculate soil water variables
            double depthFromSurface = 0.0;
            double fracLayer = 0.0;
            nLayers = soilPhysical.Thickness.Length;
            for (int layer = 0; layer < nLayers; layer++)
            {
                fracLayer = Math.Min(1.0, (depthPAWC - depthFromSurface) / soilPhysical.Thickness[layer]);
                TopLL += soilPhysical.LL15mm[layer] * fracLayer;
                TopDUL += soilPhysical.DULmm[layer] * fracLayer;
                depthFromSurface += soilPhysical.Thickness[layer];
                if (depthFromSurface >= depthPAWC)
                    layer = nLayers;
            }
        }
             
        //Determine daily requirement for irrigation
        [EventSubscribe("StartOfDay")]
        private void OnStartOfDay(object sender, EventArgs e)
        {
            //Can we irrigate today?          
            SeasonIsOpen = isBetween(Clock.Today, StartDate, EndDate);
            if (!SeasonIsOpen)
                SeasonAppliedAmount = 0;

            //Is there a crop in the ground that needs irrigation?
            CropIsActive = false;
            if ((existingCrop != null) && (existingCrop.IsAlive))
                CropIsActive = true;
            //if ((existingCrop.Phenology.Stage >= 3.0) && (existingCrop.Phenology.Stage < 6.0))
          
            //Is the irrigator available?
            IrrigatorIsAvailable = false;
            DaysSinceIrrigation += 1;
            if (DaysSinceIrrigation >= returndays)
                IrrigatorIsAvailable = true;
          
            //Is the soil dry enough to require irrigation?
            SoilIsDry = false;
            double depthFromSurface = 0.0;
            double fracLayer = 0.0;
            TopSWC = 0.0;
            for (int layer = 0; layer < nLayers; layer++)
            //for (int layer = 0; depthFromSurface < depthPAWC + soilPhysical.Thickness[layer]; layer++)
            {
                fracLayer = Math.Min(1.0, (depthPAWC - depthFromSurface) / soilPhysical.Thickness[layer]);
                TopSWC += waterBalance.SWmm[layer] * fracLayer;
                depthFromSurface += soilPhysical.Thickness[layer];
                if (depthFromSurface >= depthPAWC)
                    layer = nLayers;
            }
            
            TopSWdeficit = TopSWC - TopDUL;
            if (Math.Max(0.0, -TopSWdeficit) >= (TopDUL - TopLL) * (100 - triggerDeficit) / 100)
                SoilIsDry = true;
                
            //Are all the conditions ratifying irrigation
            if (IrrigationIsAllowed && SeasonIsOpen && CropIsActive && IrrigatorIsAvailable && SoilIsDry)
            {
                //Lets bloody well irrigate then!!!!
                AmountToApply = TopDUL * targetDeficit / 100 - TopSWC;
                AmountToApply = Math.Max(0.0, Math.Min(AmountToApply, seasonsAllocation - SeasonAppliedAmount));
                AmountToApply = Math.Min(AmountToApply,maximumAmount);
                Irrigation.Apply(AmountToApply);
                DaysSinceIrrigation = 0;
                SeasonAppliedAmount += AmountToApply;
            }
        }
        
        ///Checks whether theDate is between iniDate and endDate (non-year specific)
        private bool isBetween(DateTime theDay, DateTime iniDate, DateTime endDate)
        {
            bool result = false;
            if (iniDate.DayOfYear < endDate.DayOfYear)
            {
                // period is within one year, ex: summer in the northern hemisphere
                if ((theDay.DayOfYear >= iniDate.DayOfYear) && (theDay.DayOfYear <= endDate.DayOfYear))
                    result = true;
            }
            else
            {
                // period goes over the end of the year, ex: summer in the southern hemisphere
                if ((theDay.DayOfYear >= iniDate.DayOfYear) || (theDay.DayOfYear <= endDate.DayOfYear))
                    result = true;
            }
            
            return result;
        }
    }
}
```
          Manager FurrowIrrigation (disabled)
            asw_depth = 7
            crit_fr_asw = 0.8
            IrrigStart = 4-Dec
            IrrigEnd = 16-Mar
```csharp
// Applies irrigation into the second soil layer after a crop has been sown(lateral inflow from furrow into adjacent beds)
// Irrigation is applied on a deficit defined by the number of soil layers (depth) and a deficit value [0-1]
// Water is inserted lateral using "inflow" as would be expected under furrow irrigation of a crop on raised beds
// Water applied is not reported as irrigation and requires a local variable to track applied irrigation
// Local variable returned and available for reporting is: applied_furrow_irrigation

using Models.Interfaces;
using System;
using System.Linq;
using Models.Core;
using System.Collections.Generic;
using System.Text;
using Models.Soils;
using Models.PMF;
using System.Xml.Serialization;
using APSIM.Shared.Utilities;

namespace Models
{
    [Serializable]
    public class Script : Model
    {
        // Links
        [Link] Clock clock;
        [Link] Irrigation Irrigation;
        [Link] Soil Soil;
        [Link] IPhysical soilPhysical;
        [Link] ISoilWater waterBalance;

        // Fields
        public double SW_now;
        public double CLL_now;
        public double SW_full;

        // Properties
        [Description("Number of soil layers used in calculating SW deficit")]
        public int asw_depth { get; set; } // Change to int for layer count
        [Description("Fraction of ASW below which irrigation is applied (0-1.0)")]
        public double crit_fr_asw { get; set; } // Critical fraction of available soil water before applying irrigation
        [Description("The earliest date irrigation will be applied (dd-MMM)")]
        public string IrrigStart { get; set; } // No irrigation will be applied before this date
        [Description("The latest date irrigation will be applied (dd-MMM)")]
        public string IrrigEnd { get; set; } // No irrigation will be applied after this date

        // Output variables
        public double[] inflow_lat { get; set; }
        public double applied_furrow_irrigation { get; set; }

        // Methods

        // Calculate static soil variables
        [EventSubscribe("StartOfSimulation")]
        private void OnStartOfSimulation(object sender, EventArgs e)
        {
            // Initialize inflow_lat array
            inflow_lat = new double[soilPhysical.DULmm.Length];
        }

        // Determine daily requirement for irrigation
        [EventSubscribe("StartOfDay")]
        private void OnStartOfDay(object sender, EventArgs e)
        {
            // Is today within the irrigation window?
            if (DateUtilities.WithinDates(IrrigStart, clock.Today, IrrigEnd))
            {
                // Calculate soil water variables
                double[] SW_add = new double[soilPhysical.DULmm.Length];
                for (int layer = 0; layer < asw_depth; layer++)
                {
                    SW_now += waterBalance.SWmm[layer];
                    CLL_now += soilPhysical.LL15mm[layer];
                    SW_full += (soilPhysical.DULmm[layer] - soilPhysical.LL15mm[layer]);
                    SW_add[layer] = soilPhysical.DULmm[layer] - waterBalance.SWmm[layer];
                }

                // Is the soil water deficit greater than the critical SW fraction?
                if ((SW_now - CLL_now) <= (SW_full * crit_fr_asw))
                {
                    // Calculate irrigation and apply it
                    for (int layer = 1; layer < asw_depth; layer++)
                    {
                        inflow_lat[layer] = SW_add[layer] + (SW_add[0] / (asw_depth - 1));
                        applied_furrow_irrigation += inflow_lat[layer];
                        Irrigation.Apply(inflow_lat[layer], depth: soilPhysical.Thickness[layer]);
                    }
                }
                else
                {
                  for (int layer = 0; layer < soilPhysical.DULmm.Length; layer++)
                  {
                  inflow_lat[layer] = 0;
                  applied_furrow_irrigation = 0;            
        }
    }
}}}}
```
          Manager Harvesting
```csharp
using Models.PMF.Phen;
using APSIM.Shared.Utilities;
using System.Xml.Serialization;
using Models;
using Models.PMF;
using Models.Soils;
using System.Text;
using System.Collections.Generic;
using Models.Core;
using System;
using Models.Soils.Nutrients;

namespace Models
{
    [Serializable] 
    public class Script : Model
    {
        [Link] private Plant Cotton;
        [Link] private Zone zone;
        [Link(Type = LinkType.Path, Path = "[Cotton].Phenology")]
        private Phenology phenology;
                    
        
        [EventSubscribe("StartOfSimulation")]
        private void OnSimulationCommencing(object sender, EventArgs e)
        {
        }
        
        [EventSubscribe("DoManagement")]
        private void OnDoManagement(object sender, EventArgs e)
        {
            if (phenology.CurrentPhase.Name == "ReadyForHarvesting")
            {
                Cotton.Harvest();
                Cotton.EndCrop();
            }
        }
        
        [EventSubscribe("DoManagementCalculations")]
        private void OnDoManagementCalculations(object sender, EventArgs e)
        {
            
        }
    }
}
```
          Soil Grey Vertosol NMM: ASCOrder=Vertosol; ASCSubOrder=Grey; SoilType=Clay; Site=Myall Vale; NearestTown=Narrabri, NSW 2390; Region=North West Slopes and Plains; State=New South Wales; Country=Australia; NaturalVegetation=Grasslands; ApsoilNumber=97; Latitude=-30.2056; Longitude=149.593; LocationAccuracy=+/- 20m; YearOfSampling=0; DataSource=CSIRO Plant Industry, Myall Vale (D Richards); Comments=Clay -
            Physical
              Thickness  BD    AirDry  LL15   DUL    SAT
              150        1.31  0.109   0.109  0.475  0.476
              100        1.26  0.168   0.27   0.438  0.494
              100        1.35  0.168   0.27   0.437  0.491
              100        1.35  0.195   0.264  0.437  0.462
              100        1.35  0.195   0.264  0.437  0.462
              100        1.35  0.244   0.264  0.437  0.462
              250        1.39  0.264   0.264  0.435  0.446
              200        1.44  0.264   0.264  0.424  0.428
              200        1.45  0.264   0.264  0.424  0.424
              BD, DUL source: Field measured and checked for sensibility
              AirDry, LL15 source: Estimated based on local knowledge
              SAT source: Calculated from measured, estimated or calculated BD
              SoilCrop CottonSoil
                LL=[0.109, 0.21, 0.21, 0.244, 0.244, 0.244, 0.277, 0.302, 0.302]
                KL=[0.06, 0.06, 0.06, 0.04, 0.04, 0.04, 0.04, 0.02, 0.02]
                XF=[1, 1, 1, 1, 1, 1, 1, 1, 1]
                LL source: Field measured and checked for sensibility
            WaterBalance SoilWater: SummerDate=1-Nov; SummerU=6; SummerCona=3.5; WinterDate=1-Apr; WinterU=4; WinterCona=2.5; DiffusConst=40; DiffusSlope=16; Salb=0.12; CN2Bare=73; CNRed=20; CNCov=0.8; PSIDul=-100; Thickness=[150, 150, 300, 300, 300, 300, 300]; SWCON=[0.3, 0.3, 0.3, 0.3, 0.3, 0.3, 0.3]
            Organic: FOMCNRatio=40; CarbonUnits=Total
              Thickness  Carbon  SoilCNRatio  FBiom  FInert  FOM
              150        0.88    12           0.04   0.4     347.129
              150        0.76    12           0.02   0.6     270.344
              300        0.62    12           0.02   0.8     163.972
              300        0.32    12           0.02   1       99.454
              300        0.12    12           0.01   1       60.322
              300        0.1     12           0.01   1       36.587
              300        0.05    12           0.01   1       22.191
            Chemical: Thickness=[150, 150, 300, 300, 300, 300, 300]; PH=[8.9, 9.2, 9.3, 9, 8.8, 7.5, 8.4]; PHUnits=Water
              PH source: Estimated based on local knowledge
            Nutrient
            Water: Thickness=[150, 100, 100, 100, 100, 100, 250, 200, 200]; InitialPAWmm=214.35; RelativeTo=LL15; FilledFromTop=true
              InitialValues=[0.11, 0.494, 0.491, 0.462, 0.462, 0.462, 0.446, 0.428, 0.424]
            CERESSoilTemperature
            Solute NO3: Thickness=[150, 150, 300, 300, 300, 300, 300]; InitialValues=[29.7, 18.3, 6.4, 4, 3, 2.8, 0]; InitialValuesUnits=ppm; WaterTableConcentration=0; D0=0; DepthConstant=0; MaxDepthSoluteAccessible=0; RunoffEffectivenessAtMovingSolute=0; MaxEffectiveRunoff=0
            Solute NH4: Thickness=[150, 150, 300, 300, 300, 300, 300]; InitialValues=[0, 0, 0, 0, 0, 0, 0]; InitialValuesUnits=ppm; WaterTableConcentration=0; D0=0; DepthConstant=0; MaxDepthSoluteAccessible=0; RunoffEffectivenessAtMovingSolute=0; MaxEffectiveRunoff=0
            Solute Urea: same as Validation.NAR0607.NAR0607Ir80.paddock.Grey Vertosol NMM.NH4
            Memo
              If you look at the weather files all experiments were pre irrigated in late September – early October so soil profile would have been at DUL below surface layer(s) at planting.

              A combination of post establishment rain, clay soil and very slow crop growth (cold soil and temperatures) meant probes to 1.3 m could not be installed until about a month after establishment.

              Only the surface layers would have dried slightly by 1st probe readings.

              The plants are tiny at this stage at Narrabri so you could assume Dul below about 15 cm.

              APSIM could calculate the soil Et between planting and  probe measurement. Then if needed re set soil water = observed at first measurement and let simulation continue from that point – the error should be small.
          Manager Reset on date
            ResetDate = 28-Sep
            ResetWater = Yes
            ResetNutrients = No
            ResetSOM = No
```csharp
using Models.Soils.Nutrients;
using APSIM.Shared.Utilities;
using Models.Surface;
using Models.Utilities;
using Models.Soils.Nutrients;
using Models.Soils;
using Models.PMF;
using Models.Core;
using System;
using System.Linq;
using Models.Interfaces;

namespace Models
{
    [Serializable]
    public class Script : Model
    {
        [Link] private Clock Clock;
        [Link] private Plant Wheat;
        [Link] private ISoilWater SoilWater;
        [Link] private Nutrient nutrient;
        [Link] private SurfaceOrganicMatter SOM;
        [Link] private Summary Summary;

        [Description("Date to reset on:")]
        public string ResetDate {get;set;}

        [Description("Reset Water? (Yes or No)")]
        public string ResetWater {get;set;}

        [Description("Reset Soil Nutrients ? (Yes or No)")]
        public string ResetNutrients {get;set;}

        [Description("Reset Surface Organic Matter? (Yes or No)")]
        public string ResetSOM {get;set;}

        [EventSubscribe("DoManagement")]
        private void OnDoManagement(object sender, EventArgs e)
        {
            if (DateUtilities.WithinDates(ResetDate, Clock.Today, ResetDate))
            {
                if (ResetWater == "Yes")
                {
                    Summary.WriteMessage(this, "Reset Water", MessageType.Diagnostic);
                    SoilWater.Reset();
                }
                if (ResetNutrients == "Yes")
                {
                    Summary.WriteMessage(this, "Reset Nitrogen", MessageType.Diagnostic);
                    nutrient.Reset();
                }
                if (ResetSOM == "Yes")
                {
                    Summary.WriteMessage(this, "Reset Surface OM", MessageType.Diagnostic);
                    SOM.Reset();
                }
            }
        }
    }
}
```
          Plant Cotton: PlantType=Cotton
          Report DailyReport: EventNames=[Clock].DoReport
            VariableNames:
              [Clock].Today
              [Clock].Today.DayOfYear
              [Weather].Rain
              [Weather].MeanT
              [Weather].MaxT
              [Weather].MinT
              [Weather].Radn
              [Weather].VPD
              [Cotton].DaysAfterSowing
              [Cotton].Arbitrator.DM.TotalPlantDemand
              [Cotton].Arbitrator.DM.TotalFixationSupply
              [Cotton].Arbitrator.TotalDMFixationSupply
              [Cotton].Arbitrator.N.TotalFixationSupply
              [Cotton].Arbitrator.N.TotalPlantDemand
              [Cotton].Arbitrator.N.TotalPlantSupply
              sum([Cotton].Arbitrator.N.Fixation) as NFixed
              [Cotton].NitrogenUptake
              [Cotton].Phenology.Stage
              [Cotton].Phenology.ThermalTime
              [Cotton].Phenology.CurrentStageName
              [Cotton].Phenology.Photoperiod
              [Cotton].Phenology.EmergenceDAS
              [Cotton].Phenology.SquaringDAS
              [Cotton].Phenology.FloweringDAS
              [Cotton].Phenology.CutoutDAS
              [Cotton].Phenology.OpenbollsDAS
              [Cotton].Phenology.MaturityDAS
              [Cotton].Phenology.GrowthRateScript.Script.AboveGroundYesterday
              [Cotton].Phenology.GrowthRateScript.Script.FruitYesterday
              [Cotton].Phenology.GrowthRate.CGR
              [Cotton].Phenology.GrowthRate.FGR
              [Cotton].AboveGround.Wt
              [Cotton].AboveGround.N
              [Cotton].AboveGroundLive.Wt
              [Cotton].Leaf.NodeNumber
              [Cotton].Leaf.Fw
              [Cotton].Leaf.Fn
              [Cotton].Leaf.Photosynthesis.FT
              [Cotton].Leaf.Photosynthesis.FVPD
              [Cotton].Leaf.LAI
              [Cotton].Leaf.HeightFunction
              [Cotton].Leaf.Height
              [Cotton].Leaf.CoverGreen
              [Cotton].Leaf.CoverTotal
              [Cotton].Leaf.Live.Wt
              [Cotton].Leaf.Live.StructuralWt
              [Cotton].Leaf.Live.MetabolicWt
              [Cotton].Leaf.Allocated.MetabolicWt
              [Cotton].Leaf.Allocated.StructuralWt
              [Cotton].Leaf.Dead.StructuralWt
              [Cotton].Leaf.Dead.MetabolicWt
              [Cotton].Leaf.Live.N
              [Cotton].Leaf.Live.NConc
              [Cotton].Leaf.Dead.Wt
              [Cotton].Leaf.Dead.N
              [Cotton].Leaf.Dead.NConc
              [Cotton].Leaf.RadiationIntercepted
              [Cotton].Leaf.Wt
              [Cotton].Leaf.Nconc
              [Cotton].Leaf.N
              [Cotton].Leaf.Senesced.Wt
              [Cotton].Leaf.BranchNumber
              [Cotton].Leaf.SpecificAreaCanopy
              [Cotton].Leaf.Sites
              [Cotton].Leaf.SpecificArea
              [Cotton].Leaf.CoverTotal
              [Cotton].Stem.Wt
              [Cotton].Stem.Total.StructuralWt
              [Cotton].Stem.Live.StructuralWt
              [Cotton].Stem.Live.StructuralN
              [Cotton].Stem.N
              [Cotton].Stem.Nconc
              [Cotton].Lint.Wt
              [Cotton].Lint.N
              [Cotton].Lint.Nconc
              [Cotton].Lint.Bales as Bales
              [Cotton].Boll.HarvestIndex
              [Cotton].Lint.Allocated.Wt
              [Cotton].Lint.DMDemand.Total
              [Cotton].Leaf.DMDemand.Total
              [Cotton].Bur.DMDemand.Total
              [Cotton].Stem.DMDemand.Total
              ([Cotton].Bur.DMDemand.Total+[Cotton].Lint.DMDemand.Total+[Cotton].Seed.DMDemand.Total) as BollDemand
              ([Cotton].Stem.DMDemand.Total+[Cotton].Leaf.DMDemand.Total) as VegetativeDemand
              ([Cotton].Stem.DMDemand.Total+[Cotton].Leaf.DMDemand.Total+[Cotton].Lint.DMDemand.Total+[Cotton].Seed.DMDemand.Total+[Cotton].Bur.DMDemand.Total) as ShootDMDemand
              [Cotton].Root.DMDemand.Total
              [Cotton].Lint.NDemand.Total
              [Cotton].Leaf.NDemand.Total
              [Cotton].Stem.NDemand.Total
              [Cotton].Root.NDemand.Total
              [Cotton].Root.NUptake
              [Cotton].Lint.LiveFWt
              [Cotton].Root.Wt
              [Cotton].Root.Depth
              [Soil].Water.Volumetric[1:3]
              [Soil].Water.Volumetric
              sum([Soil].SoilWater.ESW) as TotalESW
              [Soil].SoilWater.SW
              ([Soil].SoilWater.SWmm[1]+[Soil].SoilWater.SWmm[2]+[Soil].SoilWater.SWmm[3]+[Soil].SoilWater.SWmm[4]+[Soil].SoilWater.SWmm[5]+[Soil].SoilWater.SWmm[6]) as SWmm1800
              ([Soil].SoilWater.ESW[1]+[Soil].SoilWater.ESW[2]+[Soil].SoilWater.ESW[3]+[Soil].SoilWater.ESW[4]+[Soil].SoilWater.ESW[5]+[Soil].SoilWater.ESW[6]) as ESW1800
              sum([Soil].NO3.kgha) as TotalSoilNO3
              sum([Soil]..NH4.kgha) as TotalSoilNH4
              sum([Soil].Water.MM) as TotalSW
              sum([Soil].NO3.ppm) as NO3
              sum([Soil].NH4.ppm) as NH4
              sum([Soil].Water.Volumetric) as TotalSWC
              sum([Soil].Water.MM) as TotalWaterMM
              ([Soil].Water.MM[1]+[Soil].Water.MM[2]+[Soil].Water.MM[3]+[Soil].Water.MM[4]+[Soil].Water.MM[5]+[Soil].Water.MM[6]+[Soil].Water.MM[7]) as SW1500mm
              ([Soil].Water.MM[1]+[Soil].Water.MM[2]+[Soil].Water.MM[3]+[Soil].Water.MM[4]+[Soil].Water.MM[5]+[Soil].Water.MM[6]) as SW1800mm
              ([Soil].Water.MM[1]+[Soil].Water.MM[2]+[Soil].Water.MM[3]+[Soil].Water.MM[4]+[Soil].Water.MM[5]) as SW1200mm
              (sum([CottonSoil].PAWmm)/sum([CottonSoil].PAWCmm)) as AvailableSoilMoisture
              ([CottonSoil].PAWmm[1]+[CottonSoil].PAWmm[2]+[CottonSoil].PAWmm[3]+[CottonSoil].PAWmm[4]+[CottonSoil].PAWmm[5]) as PAWTop5Layers
              -(([CottonSoil].PAWCmm[1]+[CottonSoil].PAWCmm[2]+[CottonSoil].PAWCmm[3]+[CottonSoil].PAWCmm[4]+[CottonSoil].PAWCmm[5])-([CottonSoil].PAWmm[1]+[CottonSoil].PAWmm[2]+[CottonSoil].PAWmm[3]+[CottonSoil].PAWmm[4]+[CottonSoil].PAWmm[5])) as SoilWaterDeficit120
              [Irrigation].IrrigationApplied
              [Cotton].Boll.Wt
              [Cotton].Lint.Wt
              [Cotton].Seed.Wt
              [Cotton].Bur.Wt
              [Cotton].NitrogenUptake
              sum([Soil].SoilWater.SWmm) as TotalSWmm
              ([Soil].SoilWater.SWmm[1]) as SW1
              ([Soil].SoilWater.SWmm[2]) as SW2
              ([Soil].SoilWater.SWmm[3]) as SW3
              ([Soil].SoilWater.SWmm[4]) as SW4
              ([Soil].SoilWater.SWmm[5]) as SW5
              ([Soil].SoilWater.SWmm[6]) as SW6
              ([Soil].SoilWater.SWmm[1]+[Soil].SoilWater.SWmm[2]+[Soil].SoilWater.SWmm[3]+[Soil].SoilWater.SWmm[4]+[Soil].SoilWater.SWmm[5]+[Soil].SoilWater.SWmm[6]) as SWmm1800
              //to disable reporting
              ([Soil].SoilWater.SWmm[7]) as SW7
              ([Soil].SoilWater.SWmm[8]) as SW8
              ([Soil].SoilWater.SWmm[1]+[Soil].SoilWater.SWmm[2]+[Soil].SoilWater.SWmm[3]+[Soil].SoilWater.SWmm[4]+[Soil].SoilWater.SWmm[5]+[Soil].SoilWater.SWmm[6]+[Soil].SoilWater.SWmm[7]+[Soil].SoilWater.SWmm[8]) as SWmm2400
              [Soil].SoilWater.ESW[1] as ESW1
              [Soil].SoilWater.ESW[2] as ESW2
              [Soil].SoilWater.ESW[3] as ESW3
              [Soil].SoilWater.ESW[4] as ESW4
              [Soil].SoilWater.ESW[5] as ESW5
              [Soil].SoilWater.ESW[6] as ESW6
              [Soil].SoilWater.ESW[7] as ESW7
              [Soil].SoilWater.PAWmm[1] as PAW1
              [Cotton].Arbitrator.SDRatio
              [Cotton].Arbitrator.SDRatioBound
          Report HarvestReport: same as Replacements.HarvestReport
          SurfaceOrganicMatter: InitialResidueName=nativepasture; InitialResidueType=nativepasture; InitialResidueMass=0; InitialStandingFraction=0; InitialCPR=0; InitialCNR=0
      Memo
        Should resemble an S-curve
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