Simulations: Version=80
  Memo TitlePage
    # The APSIM Cotton Model

    The APSIM Cotton model has been developed using the Plant Modelling Framework (PMF) of [brown_plant_2014]. This new framework provides a library of plant organ and process submodels that can be coupled, at runtime, to construct a model in much the same way that models can be coupled to construct a simulation. This means that dynamic composition of lower level process and organ classes (e.g. photosynthesis, leaf) into larger constructions (e.g. maize, wheat, sorghum) can be achieved by the model developer without additional coding.

    The model consists of:

    * a phenology model to simulate development between growth phases
    * a structure model to simulate plant morphology
    * a collection of organs to simulate the various plant parts
    * an arbitrator to allocate resources (N, biomass) to the various plant organs
  Memo
    OC values seem too high at depth is this correct?

    kl values too high particularly at depth - you have high cl at depth - BUT kl or xf dosen't seem to be linked to cotton?
  Memo Planting Notes
    ORANA site at Emerald

    Soil Used:  Black Vertosol (Emerald No911)

    Base Weather file:  Emerald Air Port Silo file

    Field weather station (Cambell Scientific equipment) used to overlay base weather file for all cropping periods.

    Trials run between August 2013  and  February 2017

    2013 Details
    ==========
       S1    05/08/2013   Sicot 74BRF  Solid  1m row  @  9.3 ppm_row

       S2    19/08/2013   Sicot 74BRF  Solid  1m row  @  9.4 ppm_row

       S3    02/09/2013   Sicot 74BRF  Solid  1m row  @ 11.1 ppm_row

       S4    15/09/2013   Sicot 74BRF  Solid  1m row  @ 10.1 ppm_row

    2014 Details
    ==========
       S1    03/08/2014   Sicot 74BRF  Solid  1m row  @ 10.0 ppm_row

       S2    14/08/2014   Sicot 74BRF  Solid  1m row  @ 10.0 ppm_row

       S3    02/09/2014   Sicot 74BRF  Solid  1m row  @ 10.0 ppm_row

       S4    15/09/2014   Sicot 74BRF  Solid  1m row  @ 10.0 ppm_row

    2015 Details
    ==========
       S1    01/08/2015   Sicot 74BRF  Solid  1m row  @   9.6  ppm_row

       S2    21/08/2015   Sicot 74BRF  Solid  1m row  @ 11.3  ppm_row

       S3    15/09/2015   Sicot 74BRF  Solid  1m row  @   9.5  ppm_row

    2016 Details
    ==========
       S1    01/08/2016   Sicot 746   Solid  1m row  @ 10.6   ppm_row

       S2    21/08/2016   Sicot 746   Solid  1m row  @ 11.3   ppm_row

       S3    21/08/2016   Sicot 748*  Solid  1m row  @ 12.5   ppm_row (no observed data)

       S4    15/09/2016   Sicot 746   Solid  1m row  @ 11.9   ppm_row

       S5    15/09/2016   Sicot 748*  Solid  1m row  @ 12.2   ppm_row (no observed data)
  Memo N Fertiliser Notes
    ORANA site at Emerald

    Nitrogen applicatons for Emerald trials:

    ======================================================================================================

    2013-14

    Pre-season Soil Test (July) 			0-15	15-30	30-60	60-90	90-110
    Nitrate (NO3)		mg/kg	11	2.9	1.6	1.1	1.3

    Fertiliser Management

    Pre-plant	Nitrogen	160

    Side Dressings

    Planting 1	22/10/2013	Urea		Nitrogen	110

    Planting 2	22/10/2013	Urea		Nitrogen	110

    Planting 3	13/11/2013	Urea		Nitrogen	110

    Planting 4	13/11/2013	Urea		Nitrogen	110

    ======================================================================================================

    2014-15

    Pre-season Soil Test (July) 			0-15	15-30	30-60	60-90

    Nitrate (NO3)		mg/kg	15	4.6	2.5	2.1

    Fertiliser Management

    Pre-plant	Nitrogen	160

    Side Dressings

    Planting 1	29/10/2014	Urea		Nitrogen	110

    Planting 2	29/10/2014	Urea		Nitrogen	110

    Planting 3	12/11/2014	Urea		Nitrogen	110

    Planting 4	12/11/2014	Urea		Nitrogen	110

    ======================================================================================================

    2015-16

    Pre-season Soil Test (July) 			0-15	15-30	30-60	60-100

    Nitrate (NO3)		mg/kg	8	2	3	8

    Fertiliser Management

    Pre-plant	Nitrogen	220

    Side Dressings

    Planting 1	29/08/2015	220kg	Urea	Nitrogen	101.2

    Planting 2	16/09/2015	220kg	Urea	Nitrogen	101.2

    Planting 3	21/10/2015	220kg	Urea	Nitrogen	101.2

    ======================================================================================================

    2016-17

    Pre-season Soil Test (July) 			0-15	15-30	30-60	60-90

    Nitrate (NO3)			340	88	7	7

    Fertiliser Management
    Pre-plant	Nitrogen	220

    Side Dressings

    Planting 1	29/09/2016	220kg	Urea	Nitrogen	101.2

    Planting 2	29/09/2016	220kg	Urea	Nitrogen	101.2

    Planting 3	21/10/2016	220kg	Urea	Nitrogen	101.2
  Replacements
    Plant Cotton: CropType=Cotton; IsAlive=false; IsEnding=false; DaysAfterEnding=0
      OrganArbitrator Arbitrator
        RelativeAllocation NArbitrator
        RelativeAllocation DMArbitrator
      Phenology
        Memo Introduction
          In the new model we simplified phenology by taking out stages that are not measurable (e.g. end of juvenile stage) and by adding new stages that are measurable (e.g. start pod).
          The new phenology follows the V/R staging system
        AirTemperatureFunction VegetativeThermalTime
          XYPairs: X=[10, 20, 30, 40]; Y=[0, 10, 20, 0]
        LinearInterpolationFunction VegetativePhotoperiodModifier
          XYPairs: X=[14.43, 21.19]; Y=[1, 0]
          Memo
            These parameters are overridden by cultivar parameter descriptions to capture the difference between individual cultivars in terms of their phenological development.  Responses shown here are only indicative.  See cultivar descriptions for more information.
          VariableReference XValue: VariableName=[Phenology].Photoperiod
        AirTemperatureFunction ReproductiveThermalTime
          XYPairs: X=[10, 15, 30, 40]; Y=[5, 5, 20, 0]
        LinearInterpolationFunction ReproductivePhotoperiodModifier: same as Replacements.Cotton.Phenology.VegetativePhotoperiodModifier
        PhaseLookup ThermalTime
          PhaseLookupValue PreEmergence: Start=Sowing; End=Emergence
            VariableReference Base: VariableName=[Phenology].VegetativeThermalTime
          PhaseLookupValue VegetativeGrowth: Start=Emergence; End=EndCanopyDevelopment
            MultiplyFunction TT
              VariableReference Base: VariableName=[Phenology].VegetativeThermalTime
              VariableReference PPModifier: VariableName=[Phenology].VegetativePhotoperiodModifier
          PhaseLookupValue ReproductiveGrowth: Start=EndCanopyDevelopment; End=HarvestRipe
            MultiplyFunction TT
              VariableReference Base: VariableName=[Phenology].ReproductiveThermalTime
              VariableReference PPModifier: VariableName=[Phenology].ReproductivePhotoperiodModifier
        PhotoperiodFunction Photoperiod: Twilight=0; DayLength=0
        GerminatingPhase Germinating: Start=Sowing; End=Germination
        EmergingPhase Emerging: ShootLag=10; ShootRate=1; Start=Germination; End=Emergence; TTForTimeStep=0
          VariableReference ThermalTime: VariableName=[Phenology].VegetativeThermalTime
        GenericPhase Vegetative: Start=Emergence; End=StartFlowering
          Constant Target: FixedValue=200
          VariableReference Progression: VariableName=[Phenology].ThermalTime
        GenericPhase EarlyFlowering: Start=StartFlowering; End=StartPodDevelopment
          Memo
            The duration of the grain filling phase has been taken from the model of Robertson et al (2002).
          Constant Target: FixedValue=200
          VariableReference Progression: VariableName=[Phenology].ThermalTime
        GenericPhase EarlyPodDevelopment: Start=StartPodDevelopment; End=StartGrainFilling
          Memo
            The duration of the grain filling phase has been taken from the model of Robertson et al (2002).
          Constant Target: FixedValue=140
          VariableReference Progression: VariableName=[Phenology].ThermalTime
        GenericPhase EarlyGrainFilling: Start=StartGrainFilling; End=EndCanopyDevelopment
          MultiplyFunction Target
            Constant FractionofGrainfilling: FixedValue=0.05
            VariableReference EntireGrainfilling
              VariableName=[Phenology].LateGrainFilling.Target.EntireGrainfillPeriod.FixedValue
          VariableReference Progression: VariableName=[Phenology].ThermalTime
        GenericPhase MidGrainFilling: Start=EndCanopyDevelopment; End=EndPodDevelopment
          MultiplyFunction Target
            Constant FractionofMidToLateGrainfilling: FixedValue=0.5
            SubtractFunction MidToLateGrainfilling
              VariableReference EntireGrainfilling
                VariableName=[Phenology].LateGrainFilling.Target.EntireGrainfillPeriod.FixedValue
              VariableReference EarlyGrainfilling: VariableName=[Phenology].EarlyGrainFilling.Target
          VariableReference Progression: VariableName=[Phenology].ThermalTime
        GenericPhase LateGrainFilling: Start=EndPodDevelopment; End=EndGrainFill
          SubtractFunction Target
            Constant EntireGrainfillPeriod: FixedValue=500
            VariableReference EarlyGrainFillingTarget: VariableName=[Phenology].EarlyGrainFilling.Target
            VariableReference MidGrainFillingTarget: VariableName=[Phenology].MidGrainFilling.Target
          VariableReference Progression: VariableName=[Phenology].ThermalTime
        GenericPhase Maturing: Start=EndGrainFill; End=Maturity
          Constant Target: FixedValue=45
          VariableReference Progression: VariableName=[Phenology].ThermalTime
        GenericPhase Ripening: Start=Maturity; End=HarvestRipe
          Constant Target: FixedValue=45
          VariableReference Progression: VariableName=[Phenology].ThermalTime
        EndPhase ReadyForHarvesting: Start=HarvestRipe; End=Unused
          VariableReference ThermalTime: VariableName=[Phenology].ThermalTime
        OnEventFunction EmergenceDAS: SetEvent=Emergence; ReSetEvent=never
          Memo
            A function is used to provide maturity date as days after sowing(DAS).
          Constant PreEventValue: FixedValue=0
          VariableReference PostEventValue: VariableName=[Phenology].DaysAfterSowing
        OnEventFunction FloweringDAS: SetEvent=StartFlowering; ReSetEvent=never
          Memo
            A function is used to provide flowering date as days after sowing(DAS).
          Constant PreEventValue: FixedValue=0
          VariableReference PostEventValue: VariableName=[Phenology].DaysAfterSowing
        OnEventFunction MaturityDAS: SetEvent=Maturity; ReSetEvent=never
          Memo
            A function is used to provide maturity date as days after sowing(DAS).
          Constant PreEventValue: FixedValue=0
          VariableReference PostEventValue: VariableName=[Phenology].DaysAfterSowing
      SimpleLeaf Leaf: Albedo=0.25; Gsmax350=0.015; R50=150; LeafInitialisationStage=Emergence; Height=0; BaseHeight=0; Width=0; FRGR=0; PotentialEP=0; WaterDemand=0; KDead=0; LAIDead=0
        Memo Description
          Stover represents any part of the crop that is not removed at harvest (i.e not part of the product).
        RUEModel Photosynthesis
          Constant RUE: FixedValue=1.2
          WeightedTemperatureFunction FT: MaximumTemperatureWeighting=0.5
            XYPairs: X=[10, 20, 30, 40]; Y=[0, 1, 1, 0]
          LinearInterpolationFunction FVPD
            XYPairs: X=[0, 10, 50]; Y=[1, 1, 1]
            VariableReference XValue: VariableName=[Leaf].Photosynthesis.VPD
          LinearInterpolationFunction FN
            XYPairs: X=[0, 1, 1.5]; Y=[0, 1, 1]
            VariableReference XValue: VariableName=[Leaf].Fn
          LinearInterpolationFunction FW
            XYPairs: X=[0, 1]; Y=[0, 1]
            VariableReference XValue: VariableName=[Leaf].Fw
          RUECO2Function FCO2: PhotosyntheticPathway=C3
          VariableReference RadnInt: VariableName=[Leaf].RadIntTot
        ExpressionFunction CO2internal: Expression=(163 - [IWeather].MeanT)/(5 - 0.1*[IWeather].MeanT)
        DivideFunction StomatalConductanceCO2Modifier
          VariableReference FCO2: VariableName=[Leaf].Photosynthesis.FCO2
          ExpressionFunction RelativeCO2Gradient
            Expression=([IWeather].CO2 - [Leaf].CO2internal.Value())/(350 - [Leaf].CO2internal.Value())
        MultiplyFunction Area
          VariableReference SLA: VariableName=[Leaf].SpecificArea
          VariableReference LeafLiveWt: VariableName=[Leaf].Live.Wt
        MinimumFunction FRGR
          VariableReference RUE_FT: VariableName=[Leaf].Photosynthesis.FT
          MinimumFunction Others
            VariableReference RUE_FN: VariableName=[Leaf].Photosynthesis.FN
            VariableReference RUE_FVPD: VariableName=[Leaf].Photosynthesis.FVPD
        LinearInterpolationFunction ExtinctionCoefficient
          XYPairs: X=[200, 1000]; Y=[0.6, 0.4]
          VariableReference XValue: VariableName=[Cotton].SowingData.RowSpacing
        LinearInterpolationFunction Tallness
          XYPairs: X=[1, 2, 3, 4, 5, 6, 9]; Y=[0, 0, 50, 400, 700, 900, 1000]
          VariableReference XValue: VariableName=[Phenology].Stage
        AccumulateFunction NodeNumber: StartStageName=Emergence; EndStageName=EndCanopyDevelopment; FractionRemovedOnCut=1; FractionRemovedOnHarvest=1; FractionRemovedOnGraze=1; FractionRemovedOnPrune=0
          DivideFunction DeltaNode
            VariableReference ThermalTime: VariableName=[Phenology].VegetativeThermalTime
            VariableReference Phyllochron: VariableName=[Leaf].Phyllochron
        Constant NReallocationFactor: FixedValue=1
          Memo
            This model assumes that all metabolic and storage N is available for reallocation from senescing leaves.
        PhaseLookup SenescenceRate
          PhaseLookupValue Vegetative: Start=Emergence; End=EndCanopyDevelopment
            Constant Rate: FixedValue=0
          PhaseLookupValue Reproductive: Start=EndCanopyDevelopment; End=Maturity
            Memo
              Leaf senescence rate is calculated to ensure that all leaves are senesced by crop maturity.
            DivideFunction Rate
              VariableReference TT: VariableName=[Phenology].ThermalTime
              SubtractFunction TTRemaining
                ExpressionFunction TTRequired
                  Expression=[Phenology].MidGrainFilling.Target + [Phenology].LateGrainFilling.Target + [Phenology].Maturing.Target
                ExpressionFunction TTComplete
                  Expression=[Phenology].MidGrainFilling.ProgressThroughPhase + [Phenology].LateGrainFilling.ProgressThroughPhase + [Phenology].Maturing.ProgressThroughPhase
        Constant DetachmentRate: FixedValue=1; Units=/d
        Constant InitialWt: FixedValue=1
        Constant LaiDead: FixedValue=0; Units=m^2/m^2
        LinearInterpolationFunction MaximumNConc
          XYPairs: X=[3, 4, 9]; Y=[0.06, 0.05, 0.03]
          VariableReference XValue: VariableName=[Phenology].Stage
        LinearInterpolationFunction CriticalNConc
          XYPairs: X=[3, 4, 9]; Y=[0.06, 0.05, 0.03]
          VariableReference XValue: VariableName=[Phenology].Stage
        Constant MinimumNConc: FixedValue=0.02
        Constant MaintenanceRespiration: FixedValue=0; Units=0-1
        Constant DMConversionEfficiency: FixedValue=1; Units=0-1
        BiomassRemoval BiomassRemovalDefaults
          OrganBiomassRemovalType Harvest: FractionLiveToRemove=0; FractionDeadToRemove=0; FractionLiveToResidue=0.3; FractionDeadToResidue=0
          OrganBiomassRemovalType Cut: FractionLiveToRemove=0.95; FractionDeadToRemove=0; FractionLiveToResidue=0; FractionDeadToResidue=0
          OrganBiomassRemovalType Prune: FractionLiveToRemove=0; FractionDeadToRemove=0; FractionLiveToResidue=0.6; FractionDeadToResidue=0
          OrganBiomassRemovalType Graze: FractionLiveToRemove=0.6; FractionDeadToRemove=0; FractionLiveToResidue=0.1; FractionDeadToResidue=0
        Constant NRetranslocationFactor: FixedValue=0.5
        Constant DMReallocationFactor: FixedValue=0
        Constant DMRetranslocationFactor: FixedValue=0.5
        Constant RemobilisationCost: FixedValue=0
        Constant CarbonConcentration: FixedValue=0.4
        BiomassDemand DMDemands
          DivideFunction Structural
            VariableReference DeltaLAI: VariableName=[Leaf].DeltaLAI
            VariableReference SLA: VariableName=[Leaf].SpecificArea
            Memo
              Growth in leaf area is used to calculate the leaf dry matter demand.  Note that leaf biomass is assumed to consist of entirely structural dry matter.
          Constant Storage: FixedValue=0
          Constant Metabolic: FixedValue=0
        BiomassDemand NDemands
          MultiplyFunction Structural
            VariableReference MinNconc: VariableName=[Leaf].minimumNconc
            VariableReference PotentialDMAllocation: VariableName=[Leaf].potentialDMAllocation.Structural
          MultiplyFunction Metabolic
            SubtractFunction MetabolicNconc
              VariableReference CritNconc: VariableName=[Leaf].criticalNConc
              VariableReference MinNconc: VariableName=[Leaf].minimumNconc
            VariableReference PotentialDMAllocation: VariableName=[Leaf].potentialDMAllocation.Structural
          StorageNDemandFunction Storage
            Constant NitrogenDemandSwitch: FixedValue=1
            VariableReference MaxNconc: VariableName=[Leaf].maximumNconc
        LinearInterpolationFunction FrostFraction
          XYPairs: X=[-4, 4]; Y=[1, 0]
          VariableReference XValue: VariableName=[Weather].MinT
        LinearInterpolationFunction SpecificArea
          XYPairs: X=[0.1, 6]; Y=[0.03, 0.03]
          VariableReference XValue: VariableName=[Leaf].LAI
        PhaseLookup DeltaLAI
          PhaseLookupValue Vegetative: Start=Emergence; End=EndCanopyDevelopment
            MultiplyFunction Delta
              VariableReference AreaLargestLeaf: VariableName=[Leaf].AreaLargestLeaf
              PhaseLookup RelativeArea
                PhaseLookupValue BeforeEndPod: Start=Emergence; End=StartPodDevelopment
                  LinearInterpolationFunction RelativeArea
                    XYPairs: X=[2, 7, 10, 18]; Y=[0.6666, 1, 1, 0.83]
                    VariableReference XValue: VariableName=[Leaf].NodeNumber
                PhaseLookupValue AfterEndPod: Start=StartPodDevelopment; End=EndCanopyDevelopment
                  Constant RelativeArea: FixedValue=0.4
              VariableReference PlantNumber: VariableName=[Cotton].SowingData.Population
              LinearInterpolationFunction Branches
                XYPairs: X=[0, 6, 7, 8, 9]; Y=[1, 1, 2, 2, 2]
                VariableReference XValue: VariableName=[Leaf].NodeNumber
              DivideFunction LAR
                VariableReference TT: VariableName=[Phenology].VegetativeThermalTime
                VariableReference Phyllochron: VariableName=[Leaf].Phyllochron
          PhaseLookupValue Reproductive: Start=EndCanopyDevelopment; End=Maturity
            Constant: FixedValue=0
        Constant AreaLargestLeaf: FixedValue=0.006
        Constant Phyllochron: FixedValue=45
      ReproductiveOrgan Grain: GrowthRespiration=0; MaintenanceRespiration=0
        Biomass Live: DMDOfStructural=0.6
        Biomass Dead: DMDOfStructural=0.6
        Constant PotentialHarvestIndex: FixedValue=0.5
        AddFunction FillingDuration
          VariableReference EarlyGrainFillingDuration: VariableName=[Phenology].EarlyGrainFilling.Target
          VariableReference MidGrainFillingDuration: VariableName=[Phenology].MidGrainFilling.Target
          VariableReference LateGrainFillingDuration: VariableName=[Phenology].LateGrainFilling.Target
        PhaseLookup DMDemandFunction
          PhaseLookupValue GrainFilling: Start=StartGrainFilling; End=EndGrainFill
            MultiplyFunction HIGrainDemand
              VariableReference AboveGroundWt: VariableName=[AboveGround].Wt
              DivideFunction HarvestIndexIncrease
                VariableReference PotentialHarvestIndex: VariableName=[Grain].PotentialHarvestIndex
                VariableReference FillingDuration: VariableName=[Grain].FillingDuration
              VariableReference ThermalTime: VariableName=[Phenology].ThermalTime
        Constant MinimumNConc: FixedValue=0.05
        Constant MaximumNConc: FixedValue=0.058
        Constant WaterContent: FixedValue=0.12
        MultiplyFunction NFillingRate
          VariableReference NConc: VariableName=[Grain].MaximumNConc
          VariableReference DMDemand: VariableName=[Grain].DMDemandFunction
          VariableReference DMConversionEfficiency: VariableName=[Grain].DMConversionEfficiency
        BiomassRemoval BiomassRemovalDefaults
          OrganBiomassRemovalType Harvest: FractionLiveToRemove=1; FractionDeadToRemove=0; FractionLiveToResidue=0; FractionDeadToResidue=0
          OrganBiomassRemovalType Cut: FractionLiveToRemove=1; FractionDeadToRemove=0; FractionLiveToResidue=0; FractionDeadToResidue=0
          OrganBiomassRemovalType Prune: FractionLiveToRemove=0; FractionDeadToRemove=0; FractionLiveToResidue=0.8; FractionDeadToResidue=0
          OrganBiomassRemovalType Graze: FractionLiveToRemove=0.6; FractionDeadToRemove=0; FractionLiveToResidue=0.2; FractionDeadToResidue=0
        Constant DMConversionEfficiency: FixedValue=0.89
        Constant RemobilisationCost: FixedValue=0
        Constant CarbonConcentration: FixedValue=0.4
        DivideFunction HarvestIndex
          VariableReference GrainWt: VariableName=[Grain].Wt
          VariableReference AboveGroundWt: VariableName=[AboveGround].Wt
        Constant MaximumPotentialGrainSize: FixedValue=0
          Memo
            This parameter is not used.  Grain growth is calculated from harvest index increase.
        Constant NumberFunction: FixedValue=0
          Memo
            Grain number is not estimated by this model.
      Root: GrowthRespiration=0; MaintenanceRespiration=0; RootAngle=45
        LinearInterpolationFunction KLModifier
          XYPairs: X=[0, 3]; Y=[1, 1]
          VariableReference XValue: VariableName=[Leaf].LAI
        AirTemperatureFunction TemperatureEffect
          XYPairs: X=[0, 26, 35]; Y=[1, 1, 1]
        LinearInterpolationFunction MaxDailyNUptake
          XYPairs: X=[0, 5]; Y=[1, 3]
          VariableReference XValue: VariableName=[Leaf].LAI
        Constant SenescenceRate: FixedValue=0.005
        Constant MaximumRootDepth: FixedValue=1000000
        PhaseLookup RootFrontVelocity
          PhaseLookupValue PreEmergence: Start=Germination; End=Emergence
            Constant Function: FixedValue=5
          PhaseLookupValue early: Start=Emergence; End=StartGrainFilling
            Constant Function: FixedValue=30
          PhaseLookupValue late: Start=StartGrainFilling; End=Maturity
            Constant Function: FixedValue=5
        Constant MaximumNConc: FixedValue=0.01
        Constant MinimumNConc: FixedValue=0.005
        PhaseBasedSwitch NitrogenDemandSwitch: Start=Emergence; End=EndGrainFill
        LinearInterpolationFunction KNO3
          XYPairs: X=[0, 0.003]; Y=[0.02, 0.02]
          VariableReference XValue: VariableName=[Root].LengthDensity
        LinearInterpolationFunction KNH4
          XYPairs: X=[0, 0.003]; Y=[0, 0]
          VariableReference XValue: VariableName=[Root].LengthDensity
        BiomassRemoval BiomassRemovalDefaults
          OrganBiomassRemovalType Harvest: FractionLiveToRemove=0; FractionDeadToRemove=0; FractionLiveToResidue=0.2; FractionDeadToResidue=0
          OrganBiomassRemovalType Cut: FractionLiveToRemove=0; FractionDeadToRemove=0; FractionLiveToResidue=0.3; FractionDeadToResidue=0
          OrganBiomassRemovalType Prune: FractionLiveToRemove=0; FractionDeadToRemove=0; FractionLiveToResidue=0.1; FractionDeadToResidue=0
          OrganBiomassRemovalType Graze: FractionLiveToRemove=0; FractionDeadToRemove=0; FractionLiveToResidue=0.15; FractionDeadToResidue=0
        LinearInterpolationFunction NUptakeSWFactor
          XYPairs: X=[0, 1]; Y=[0, 1]
          VariableReference XValue: VariableName=[Root].RWC
        Constant InitialDM: FixedValue=0.2; Units=g/plant
        Constant SpecificRootLength: FixedValue=40; Units=m/g
        Constant DMConversionEfficiency: FixedValue=1
        Constant MaintenanceRespirationFunction: FixedValue=1
        Constant RemobilisationCost: FixedValue=0
        Constant CarbonConcentration: FixedValue=0.4
        BiomassDemand DMDemands
          MultiplyFunction Structural
            PartitionFractionDemandFunction DMDemandFunction
              PhaseLookup PartitionFraction
                PhaseLookupValue Early: Start=Emergence; End=StartFlowering
                  Constant Function: FixedValue=0.2
                PhaseLookupValue Middle: Start=StartFlowering; End=StartGrainFilling
                  Constant Function: FixedValue=0.2
                PhaseLookupValue Late: Start=StartGrainFilling; End=Maturity
                  Constant Function: FixedValue=0.05
            Constant StructuralFraction: FixedValue=1
          Constant Metabolic: FixedValue=0
          StorageDMDemandFunction Storage
            SubtractFunction StorageFraction
              Constant One: FixedValue=1
              VariableReference StructuralFraction: VariableName=[Root].DMDemands.Structural.StructuralFraction
        BiomassDemand NDemands
          MultiplyFunction Structural
            VariableReference MinNconc: VariableName=[Root].minimumNconc
            VariableReference PotentialDMAllocation: VariableName=[Root].potentialDMAllocation.Structural
          MultiplyFunction Metabolic
            SubtractFunction MetabolicNconc
              VariableReference CritNconc: VariableName=[Root].criticalNConc
              VariableReference MinNconc: VariableName=[Root].minimumNconc
            VariableReference PotentialDMAllocation: VariableName=[Root].potentialDMAllocation.Structural
          StorageNDemandFunction Storage
            VariableReference NitrogenDemandSwitch: VariableName=[Root].nitrogenDemandSwitch
            VariableReference MaxNconc: VariableName=[Root].maximumNconc
      Nodule
        Constant FixationMetabolicCost: FixedValue=0
        Constant MaximumNConc: FixedValue=0.02
        Constant MinimumNConc: FixedValue=0.01
        Constant SenescenceRate: FixedValue=0
        Constant NReallocationFactor: FixedValue=0
        PhaseBasedSwitch NitrogenDemandSwitch: Start=Emergence; End=EndGrainFill
        BiomassRemoval BiomassRemovalDefaults
          OrganBiomassRemovalType Harvest: FractionLiveToRemove=0.5; FractionDeadToRemove=0; FractionLiveToResidue=0.1; FractionDeadToResidue=0
          OrganBiomassRemovalType Cut: FractionLiveToRemove=0.8; FractionDeadToRemove=0; FractionLiveToResidue=0; FractionDeadToResidue=0
          OrganBiomassRemovalType Prune: FractionLiveToRemove=0; FractionDeadToRemove=0; FractionLiveToResidue=0.6; FractionDeadToResidue=0
          OrganBiomassRemovalType Graze: FractionLiveToRemove=0.6; FractionDeadToRemove=0; FractionLiveToResidue=0.2; FractionDeadToResidue=0
        Constant InitialWtFunction: FixedValue=0; Units=g/m^2
        Constant DetachmentRateFunction: FixedValue=0; Units=/d
        Constant MaintenanceRespirationFunction: FixedValue=0; Units=0-1
        Constant DMConversionEfficiency: FixedValue=1; Units=0-1
        Constant NRetranslocationFactor: FixedValue=0
        Constant DMReallocationFactor: FixedValue=0
        Constant DMRetranslocationFactor: FixedValue=0
        VariableReference CriticalNConc: VariableName=[Nodule].MinimumNConc
        Constant RemobilisationCost: FixedValue=0
        Constant CarbonConcentration: FixedValue=0.4
        HoldFunction FixationRate: WhenToHold=StartGrainFilling
          MinimumFunction DailyPotentialFixationRate
            MultiplyFunction PotentialFixationRate
              VariableReference LiveBiomass: VariableName=[AboveGroundLive].Wt
              PhaseLookup SpecificFixationRate
                PhaseLookupValue VegetativeGrowth: Start=Emergence; End=StartFlowering
                  Constant Rate: FixedValue=0.006
                PhaseLookupValue ReproductiveGrowth: Start=StartFlowering; End=EndGrainFill
                  Constant Rate: FixedValue=0.002
            Constant MaximumFixationRate: FixedValue=0.6
        BiomassDemand DMDemands
          MultiplyFunction Structural
            PartitionFractionDemandFunction DMDemandFunction
              PhaseLookup PartitionFraction
                PhaseLookupValue Early: Start=Emergence; End=StartFlowering
                  Constant Function: FixedValue=0.03
                PhaseLookupValue Middle: Start=StartFlowering; End=StartGrainFilling
                  Constant Function: FixedValue=0.02
                PhaseLookupValue Late: Start=StartGrainFilling; End=Maturity
                  Constant Function: FixedValue=0
            Constant StructuralFraction: FixedValue=1; Units=g/g
          Constant Metabolic: FixedValue=0
          StorageDMDemandFunction Storage
            SubtractFunction StorageFraction
              Constant One: FixedValue=1
              VariableReference StructuralFraction: VariableName=[Nodule].DMDemands.Structural.StructuralFraction
        BiomassDemand NDemands
          MultiplyFunction Structural
            VariableReference MinNconc: VariableName=[Nodule].minimumNconc
            VariableReference PotentialDMAllocation: VariableName=[Nodule].potentialDMAllocation.Structural
          MultiplyFunction Metabolic
            SubtractFunction MetabolicNconc
              VariableReference CritNconc: VariableName=[Nodule].criticalNConc
              VariableReference MinNconc: VariableName=[Nodule].minimumNconc
            VariableReference PotentialDMAllocation: VariableName=[Nodule].potentialDMAllocation.Structural
          StorageNDemandFunction Storage
            VariableReference NitrogenDemandSwitch: VariableName=[Nodule].nitrogenDemandSwitch
            VariableReference MaxNconc: VariableName=[Nodule].maximumNconc
      GenericOrgan Shell: IsAboveGround=true
        Constant NReallocationFactor: FixedValue=1
        Constant NRetranslocationFactor: FixedValue=0.5
        Constant MaximumNConc: FixedValue=0.045
        VariableReference CriticalNConc: VariableName=[Shell].MinimumNConc
        Constant MinimumNConc: FixedValue=0.01
        Constant DMRetranslocationFactor: FixedValue=0.1
        PhaseBasedSwitch NitrogenDemandSwitch: Start=StartPodDevelopment; End=EndPodDevelopment
        BiomassRemoval BiomassRemovalDefaults: same as Replacements.Cotton.Nodule.BiomassRemovalDefaults
        Constant InitialWtFunction: FixedValue=0; Units=g/m^2
        PhaseLookup SenescenceRate
          PhaseLookupValue ReproductivePhase: Start=StartPodDevelopment; End=Maturity
            MinimumFunction Rate
              DivideFunction Fraction
                VariableReference TT: VariableName=[Phenology].ThermalTime
                SubtractFunction TTRemaining
                  ExpressionFunction ReproductiveTT
                    Expression=[Phenology].EarlyPodDevelopment.Target+[Phenology].EarlyGrainFilling.Target+[Phenology].MidGrainFilling.Target+[Phenology].LateGrainFilling.Target
                  ExpressionFunction ReproductiveTT1Complete
                    Expression=[Phenology].EarlyPodDevelopment.ProgressThroughPhase+[Phenology].EarlyGrainFilling.ProgressThroughPhase+[Phenology].MidGrainFilling.ProgressThroughPhase+[Phenology].LateGrainFilling.ProgressThroughPhase
              Constant One: FixedValue=1
        Constant DetachmentRateFunction: FixedValue=0; Units=/d
        Constant MaintenanceRespirationFunction: FixedValue=0; Units=0-1
        Constant DMConversionEfficiency: FixedValue=1; Units=0-1
        Constant DMReallocationFactor: FixedValue=0
        Constant RemobilisationCost: FixedValue=0
        Constant CarbonConcentration: FixedValue=0.4
        Constant PotentialHarvestIndex: FixedValue=0.2
        AddFunction FillingDuration
          VariableReference EarlyPodDevelopmentDuration: VariableName=[Phenology].EarlyPodDevelopment.Target
          VariableReference EarlyGrainFillingDuration: VariableName=[Phenology].EarlyGrainFilling.Target
          VariableReference MidGrainFillingDuration: VariableName=[Phenology].MidGrainFilling.Target
        BiomassDemand DMDemands
          MultiplyFunction Structural
            PhaseLookup DMDemandFunction
              PhaseLookupValue PodDevelopment: Start=StartPodDevelopment; End=EndPodDevelopment
                MultiplyFunction HIPodDemand
                  VariableReference AboveGroundWt: VariableName=[AboveGround].Wt
                  DivideFunction HarvestIndexIncrease
                    VariableReference PotentialHarvestIndex: VariableName=[Shell].PotentialHarvestIndex
                    VariableReference FillingDuration: VariableName=[Shell].FillingDuration
                  VariableReference ThermalTime: VariableName=[Phenology].ThermalTime
            Constant StructuralFraction: FixedValue=1
          Constant Metabolic: FixedValue=0
          StorageDMDemandFunction Storage
            SubtractFunction StorageFraction
              Constant One: FixedValue=1
              VariableReference StructuralFraction: VariableName=[Shell].DMDemands.Structural.StructuralFraction
        BiomassDemand NDemands
          MultiplyFunction Structural
            VariableReference MinNconc: VariableName=[Shell].minimumNconc
            VariableReference PotentialDMAllocation: VariableName=[Shell].potentialDMAllocation.Structural
          StorageNDemandFunction Storage
            VariableReference NitrogenDemandSwitch: VariableName=[Shell].nitrogenDemandSwitch
            VariableReference MaxNconc: VariableName=[Shell].maximumNconc
          Constant Metabolic: FixedValue=0
        RetranslocateNonStructural RetranslocateNitrogen
      GenericOrgan Stem: IsAboveGround=true
        Constant NReallocationFactor: FixedValue=1
        Constant NRetranslocationFactor: FixedValue=0.5
        PhaseLookup DMRetranslocationFactor
          PhaseLookupValue GrainFilling: Start=EndCanopyDevelopment; End=EndGrainFill
            Constant RetranslocationFactor: FixedValue=0.2
        LinearInterpolationFunction MaximumNConc
          XYPairs: X=[3, 4, 5]; Y=[0.025, 0.02, 0.015]
          VariableReference XValue: VariableName=[Phenology].Stage
        Constant MinimumNConc: FixedValue=0.006
        PhaseBasedSwitch NitrogenDemandSwitch: Start=Emergence; End=StartGrainFilling
        BiomassRemoval BiomassRemovalDefaults: same as Replacements.Cotton.Nodule.BiomassRemovalDefaults
        Constant InitialWtFunction: FixedValue=0; Units=g/m^2
        PhaseLookup SenescenceRate
          PhaseLookupValue PostCanopyPhase: Start=EndCanopyDevelopment; End=Maturity
            MinimumFunction Rate
              DivideFunction Fraction
                VariableReference TT: VariableName=[Phenology].ThermalTime
                SubtractFunction TTRemaining
                  ExpressionFunction PostCanopyTT
                    Expression=[Phenology].EarlyPodDevelopment.Target+[Phenology].EarlyGrainFilling.Target+[Phenology].MidGrainFilling.Target+[Phenology].LateGrainFilling.Target
                  ExpressionFunction PostCanopyTTComplete
                    Expression=[Phenology].MidGrainFilling.ProgressThroughPhase+[Phenology].LateGrainFilling.ProgressThroughPhase
              Constant One: FixedValue=1
        Constant DetachmentRateFunction: FixedValue=0; Units=/d
        Constant MaintenanceRespirationFunction: FixedValue=0; Units=0-1
        Constant DMConversionEfficiency: FixedValue=1; Units=0-1
        Constant DMReallocationFactor: FixedValue=0
        VariableReference CriticalNConc: VariableName=[Stem].MinimumNConc
        Constant RemobilisationCost: FixedValue=0
        Constant CarbonConcentration: FixedValue=0.4
        BiomassDemand DMDemands
          MultiplyFunction Structural
            PhaseLookup Fraction
              PhaseLookupValue StemGrowthPhase: Start=Emergence; End=StartPodDevelopment
                Constant Fraction: FixedValue=0.75
              PhaseLookupValue PodAndGrainGrowth: Start=StartPodDevelopment; End=EndGrainFill
                Constant Fraction: FixedValue=0
            VariableReference DMDemand: VariableName=[Stem].PotentialGrowth
          Constant Metabolic: FixedValue=0
          MultiplyFunction Storage
            VariableReference DMDemand: VariableName=[Stem].PotentialGrowth
            SubtractFunction StorageFraction
              Constant One: FixedValue=1
              VariableReference StructuralFraction: VariableName=[Stem].DMDemands.Structural.Fraction
        BiomassDemand NDemands
          MultiplyFunction Structural
            VariableReference MinNconc: VariableName=[Stem].minimumNconc
            VariableReference PotentialDMAllocation: VariableName=[Stem].potentialDMAllocation.Structural
          MultiplyFunction Metabolic
            SubtractFunction MetabolicNconc
              VariableReference CritNconc: VariableName=[Stem].criticalNConc
              VariableReference MinNconc: VariableName=[Stem].minimumNconc
            VariableReference PotentialDMAllocation: VariableName=[Stem].potentialDMAllocation.Structural
          StorageNDemandFunction Storage
            VariableReference NitrogenDemandSwitch: VariableName=[Stem].nitrogenDemandSwitch
            VariableReference MaxNconc: VariableName=[Stem].maximumNconc
        PartitionFractionDemandFunction PotentialGrowth
          PhaseLookup PartitionFraction
            PhaseLookupValue StemGrowthPhase: Start=Emergence; End=EndPodDevelopment
              Constant StemFraction: FixedValue=0.4
            PhaseLookupValue GrainFilling: Start=EndPodDevelopment; End=EndGrainFill
              Constant StemFraction: FixedValue=0
        RetranslocateNonStructural RetranslocateNitrogen
      CompositeBiomass AboveGround: DMDOfStructural=0.6
        Propertys=[[Leaf].Live, [Leaf].Dead, [Stem].Live, [Stem].Dead, [Grain].Live, [Grain].Dead, [Shell].Live, [Shell].Dead]
      CompositeBiomass BelowGround: Propertys=[[Root].Live, [Root].Dead, [Nodule].Live, [Nodule].Dead]; DMDOfStructural=0.6
      CompositeBiomass AboveGroundLive: Propertys=[[Leaf].Live, [Stem].Live, [Grain].Live, [Shell].Live]; DMDOfStructural=0.6
      CompositeBiomass Total: DMDOfStructural=0.6
        Propertys=[[Leaf].Live, [Leaf].Dead, [Stem].Live, [Stem].Dead, [Grain].Live, [Grain].Dead, [Shell].Live, [Shell].Dead, [Root].Live, [Root].Dead, [Nodule].Live, [Nodule].Dead]
      CompositeBiomass TotalLive: DMDOfStructural=0.6
        Propertys=[[Leaf].Live, [Stem].Live, [Grain].Live, [Shell].Live, [Root].Live, [Nodule].Live]
      CompositeBiomass TotalDead: DMDOfStructural=0.6
        Propertys=[[Leaf].Dead, [Stem].Dead, [Grain].Dead, [Shell].Dead, [Root].Dead, [Nodule].Dead]
      CompositeBiomass Pod: Propertys=[[Shell].Live, [Shell].Dead, [Grain].Live, [Grain].Dead]; DMDOfStructural=0.6
      Memo
        ## References

        ### **Ayaz S, McKenzie BA, McNeil DL, Hill GD.** **2004**. Light interception and utilization of four grain legumes sown at different plant populations and depths. _Journal of Agricultural Science,_ **142**: 297-308.
         **Ayaz S, McKenzie BA, Hill GD, McNeil DL.** **2004**. Variability in yield of four grain legume species in a subhumid temperate environment. II. Yield components. _Journal of Agricultural Science,_ **142**: 21-28.
         **Ayaz S, McKenzie BA, Hill GD, McNeil DL.** **2004**. Nitrogen distribution in four grain legumes. _Journal of Agricultural Science,_ **142**: 309-317.
         **Wilson DR, Robertson MJ.** **1996.** Pea phenology responses to temperature and photoperiod. _Australian Agronomy Society_.
      CultivarFolder Australia
        Cultivar Sicot74
          Command:
            [Phenology].Vegetative.Target.FixedValue = 380
            [Phenology].EarlyFlowering.Target.FixedValue = 80
            [Phenology].EarlyGrainFilling.Target.FractionofGrainfilling.FixedValue = 0.05
            [Phenology].LateGrainFilling.Target.EntireGrainfillPeriod.FixedValue = 440
            [Phenology].VegetativePhotoperiodModifier.XYPairs.X = 13.26, 16.67
            [Phenology].ReproductivePhotoperiodModifier.XYPairs.X = 13.26, 16.67
            [Leaf].AreaLargestLeaf.FixedValue=0.009
        Cultivar Sicot746: same as Replacements.Cotton.Australia.Sicot74
        Cultivar Sicot71: same as Replacements.Cotton.Australia.Sicot74
        Cultivar Buchanan
          Command:
            [Phenology].Vegetative.Target.FixedValue = 480
            [Phenology].EarlyFlowering.Target.FixedValue = 100
            [Phenology].EarlyGrainFilling.Target.FractionofGrainfilling.FixedValue = 0.015
            [Phenology].LateGrainFilling.Target.EntireGrainfillPeriod.FixedValue = 467
            [Phenology].VegetativePhotoperiodModifier.XYPairs.X = 12.39, 15.61
            [Phenology].ReproductivePhotoperiodModifier.XYPairs.X = 12.39, 15.61
            [Phenology].MidGrainFilling.Target.FractionofMidToLateGrainfilling.FixedValue=0.33
            [Grain].MaximumNConc.FixedValue = 0.067
            [Stem].PotentialGrowth.PartitionFraction.StemGrowthPhase.StemFraction.FixedValue = 0.5
            [Leaf].AreaLargestLeaf.FixedValue=0.009
        Cultivar Djakal
          Command:
            [Phenology].Vegetative.Target.FixedValue = 380
            [Phenology].EarlyFlowering.Target.FixedValue = 100
            [Phenology].EarlyGrainFilling.Target.FractionofGrainfilling.FixedValue = 0.05
            [Phenology].LateGrainFilling.Target.EntireGrainfillPeriod.FixedValue = 405
            [Phenology].VegetativePhotoperiodModifier.XYPairs.X = 13.75, 17
            [Phenology].ReproductivePhotoperiodModifier.XYPairs.X = 11.9, 15.5
            [Leaf].AreaLargestLeaf.FixedValue=0.009
        Cultivar Davis
          Command:
            [Phenology].Vegetative.Target.FixedValue = 480
            [Phenology].EarlyFlowering.Target.FixedValue = 100
            [Phenology].EarlyGrainFilling.Target.FractionofGrainfilling.FixedValue = 0.015
            [Phenology].LateGrainFilling.Target.EntireGrainfillPeriod.FixedValue = 467
            [Phenology].VegetativePhotoperiodModifier.XYPairs.X = 12.39, 15.61
            [Phenology].ReproductivePhotoperiodModifier.XYPairs.X = 12.39, 15.61
            [Phenology].MidGrainFilling.Target.FractionofMidToLateGrainfilling.FixedValue=0.33
            [Grain].MaximumNConc.FixedValue = 0.067
            [Stem].PotentialGrowth.PartitionFraction.StemGrowthPhase.StemFraction.FixedValue = 0.5
            [Leaf].AreaLargestLeaf.FixedValue=0.012
        Cultivar Hooper_MG40: same as Replacements.Cotton.Australia.Sicot74
        Cultivar Stephens_MG40
          Command:
            [Phenology].Vegetative.Target.FixedValue = 360
            [Phenology].EarlyFlowering.Target.FixedValue = 80
            [Phenology].EarlyGrainFilling.Target.FractionofGrainfilling.FixedValue = 0.05
            [Phenology].LateGrainFilling.Target.EntireGrainfillPeriod.FixedValue = 440
            [Phenology].VegetativePhotoperiodModifier.XYPairs.X = 13.26, 16.67
            [Phenology].ReproductivePhotoperiodModifier.XYPairs.X = 13.26, 16.67
            [Leaf].AreaLargestLeaf.FixedValue=0.009
        Cultivar FiskebyV
          Command:
            [Phenology].Vegetative.Target.FixedValue = 285
            [Phenology].EarlyFlowering.Target.FixedValue = 80
            [Phenology].EarlyGrainFilling.Target.FractionofGrainfilling.FixedValue = 0.05
            [Phenology].LateGrainFilling.Target.EntireGrainfillPeriod.FixedValue = 405
            [Phenology].VegetativePhotoperiodModifier.XYPairs.X = 13.75, 18
            [Phenology].ReproductivePhotoperiodModifier.XYPairs.X = 13.75, 18
          Memo
            Early-maturing, photoperiod-insensitive cultivar developed in Sweden for high latitude environments
        Cultivar F148_7
          Command:
            [Phenology].Vegetative.Target.FixedValue = 314
            [Phenology].EarlyFlowering.Target.FixedValue = 80
            [Phenology].EarlyGrainFilling.Target.FractionofGrainfilling.FixedValue = 0.05
            [Phenology].LateGrainFilling.Target.EntireGrainfillPeriod.FixedValue = 485
            [Phenology].VegetativePhotoperiodModifier.XYPairs.X = 13.75, 17
            [Phenology].ReproductivePhotoperiodModifier.XYPairs.X = 12, 18
            [Leaf].AreaLargestLeaf.FixedValue=0.009
          Memo
            Indeterminate breeding selection from the national Cotton breeding program combining phytophthora resistance, earliness,
            culinary quality, and yield
        Cultivar Bowyer
          Command:
            [Phenology].Vegetative.Target.FixedValue = 377
            [Phenology].EarlyFlowering.Target.FixedValue = 80
            [Phenology].EarlyGrainFilling.Target.FractionofGrainfilling.FixedValue = 0.05
            [Phenology].LateGrainFilling.Target.EntireGrainfillPeriod.FixedValue = 405
            [Phenology].VegetativePhotoperiodModifier.XYPairs.X = 13.75, 15.5
            [Phenology].ReproductivePhotoperiodModifier.XYPairs.X = 11.9, 15.5
          Memo
            Brown hilum cultivar, adapted to southern New South Wales, released by K McWhirter in 1982
        Cultivar Bunya
          Command:
            [Phenology].Vegetative.Target.FixedValue = 550
            [Phenology].EarlyFlowering.Target.FixedValue = 80
            [Phenology].EarlyGrainFilling.Target.FractionofGrainfilling.FixedValue = 0.05
            [Phenology].LateGrainFilling.Target.EntireGrainfillPeriod.FixedValue = 405
            [Phenology].VegetativePhotoperiodModifier.XYPairs.X = 13.75, 18
            [Phenology].ReproductivePhotoperiodModifier.XYPairs.X = 10.9, 15.5
            [Leaf].AreaLargestLeaf.FixedValue=0.009
          Memo
            Culinary cultivar released in 2006 by CSIRO with broad adaptation from northern New South Wales to northern Queensland
        Cultivar Cowrie
          Command:
            [Phenology].Vegetative.Target.FixedValue = 390
            [Phenology].EarlyFlowering.Target.FixedValue = 80
            [Phenology].EarlyGrainFilling.Target.FractionofGrainfilling.FixedValue = 0.05
            [Phenology].LateGrainFilling.Target.EntireGrainfillPeriod.FixedValue = 425
            [Phenology].VegetativePhotoperiodModifier.XYPairs.X = 12.75, 16
            [Phenology].ReproductivePhotoperiodModifier.XYPairs.X = 12.75, 16
            [Leaf].AreaLargestLeaf.FixedValue=0.009
          Memo
            Light hilum cultivar released by theNewSouth Wales Department of Agriculture for the coastal Northern Rivers District inNewSouth Wales
        Cultivar Soya791
          Command:
            [Phenology].Vegetative.Target.FixedValue = 430
            [Phenology].EarlyFlowering.Target.FixedValue = 80
            [Phenology].EarlyGrainFilling.Target.FractionofGrainfilling.FixedValue = 0.05
            [Phenology].LateGrainFilling.Target.EntireGrainfillPeriod.FixedValue = 425
            [Phenology].VegetativePhotoperiodModifier.XYPairs.X = 12.75, 15.3
            [Phenology].ReproductivePhotoperiodModifier.XYPairs.X = 12.75, 15.3
            [Leaf].AreaLargestLeaf.FixedValue=0.009
        Cultivar Manark
          Command:
            [Phenology].Vegetative.Target.FixedValue = 440
            [Phenology].EarlyFlowering.Target.FixedValue = 80
            [Phenology].EarlyGrainFilling.Target.FractionofGrainfilling.FixedValue = 0.05
            [Phenology].LateGrainFilling.Target.EntireGrainfillPeriod.FixedValue = 425
            [Phenology].VegetativePhotoperiodModifier.XYPairs.X = 12.75, 15
            [Phenology].ReproductivePhotoperiodModifier.XYPairs.X = 12.75, 15
            [Leaf].AreaLargestLeaf.FixedValue=0.009
        Cultivar Warrigal
          Command:
            [Phenology].Vegetative.Target.FixedValue = 490
            [Phenology].EarlyFlowering.Target.FixedValue = 80
            [Phenology].EarlyGrainFilling.Target.FractionofGrainfilling.FixedValue = 0.05
            [Phenology].LateGrainFilling.Target.EntireGrainfillPeriod.FixedValue = 425
            [Phenology].VegetativePhotoperiodModifier.XYPairs.X = 12.75, 15
            [Phenology].ReproductivePhotoperiodModifier.XYPairs.X = 12.75, 15
            [Leaf].AreaLargestLeaf.FixedValue=0.009
        Cultivar Leichhardt
          Command:
            [Phenology].Vegetative.Target.FixedValue = 806
            [Phenology].EarlyFlowering.Target.FixedValue = 80
            [Phenology].EarlyGrainFilling.Target.FractionofGrainfilling.FixedValue = 0.05
            [Phenology].LateGrainFilling.Target.EntireGrainfillPeriod.FixedValue = 425
            [Phenology].VegetativePhotoperiodModifier.XYPairs.X = 12.75, 14.7
            [Phenology].ReproductivePhotoperiodModifier.XYPairs.X = 12.75, 14.7
            [Leaf].AreaLargestLeaf.FixedValue=0.009
        Cultivar Djakal1
          Command:
            [Phenology].Vegetative.Target.FixedValue = 332
            [Phenology].EarlyFlowering.Target.FixedValue = 80
            [Phenology].EarlyGrainFilling.Target.FractionofGrainfilling.FixedValue = 0.05
            [Phenology].LateGrainFilling.Target.EntireGrainfillPeriod.FixedValue = 440
            [Phenology].VegetativePhotoperiodModifier.XYPairs.X = 13.26, 16.67
            [Phenology].ReproductivePhotoperiodModifier.XYPairs.X = 13.26, 16.67
            [Leaf].AreaLargestLeaf.FixedValue=0.009
      CultivarFolder USA
        Cultivar Trial_MG00
          Command:
            [Phenology].Vegetative.Target.FixedValue = 268
            [Phenology].EarlyFlowering.Target.FixedValue = 76
            [Phenology].EarlyGrainFilling.Target.FractionofGrainfilling.FixedValue = 0.05
            [Phenology].LateGrainFilling.Target.EntireGrainfillPeriod.FixedValue = 432
            [Phenology].VegetativePhotoperiodModifier.XYPairs.X = 14.43, 21.19
            [Phenology].ReproductivePhotoperiodModifier.XYPairs.X = 14.43, 21.19
        Cultivar Lambert_MG0
          Command:
            [Phenology].Vegetative.Target.FixedValue = 294
            [Phenology].EarlyFlowering.Target.FixedValue = 81
            [Phenology].EarlyGrainFilling.Target.FractionofGrainfilling.FixedValue = 0.05
            [Phenology].LateGrainFilling.Target.EntireGrainfillPeriod.FixedValue = 442
            [Phenology].VegetativePhotoperiodModifier.XYPairs.X = 14.29, 20.14
            [Phenology].ReproductivePhotoperiodModifier.XYPairs.X = 14.29, 20.14
        Cultivar IA1006_MG10
          Command:
            [Phenology].Vegetative.Target.FixedValue = 336
            [Phenology].EarlyFlowering.Target.FixedValue = 118
            [Phenology].EarlyGrainFilling.Target.FractionofGrainfilling.FixedValue = 0.05
            [Phenology].LateGrainFilling.Target.EntireGrainfillPeriod.FixedValue = 518
            [Phenology].VegetativePhotoperiodModifier.XYPairs.X = 14.37, 19.30
            [Phenology].ReproductivePhotoperiodModifier.XYPairs.X = 14.37, 19.30
        Cultivar IA2008_MG20
          Command:
            [Phenology].Vegetative.Target.FixedValue = 329
            [Phenology].EarlyFlowering.Target.FixedValue = 150
            [Phenology].EarlyGrainFilling.Target.FractionofGrainfilling.FixedValue = 0.05
            [Phenology].LateGrainFilling.Target.EntireGrainfillPeriod.FixedValue = 580
            [Phenology].VegetativePhotoperiodModifier.XYPairs.X = 13.92, 17.93
            [Phenology].ReproductivePhotoperiodModifier.XYPairs.X = 13.92, 17.93
        Cultivar PioneerP22T61_MG22
          Command:
            [Phenology].Vegetative.Target.FixedValue = 328
            [Phenology].EarlyFlowering.Target.FixedValue = 106
            [Phenology].EarlyGrainFilling.Target.FractionofGrainfilling.FixedValue = 0.3
            [Phenology].LateGrainFilling.Target.EntireGrainfillPeriod.FixedValue = 499
            [Phenology].VegetativePhotoperiodModifier.XYPairs.X = 13.59, 17.6
            [Phenology].ReproductivePhotoperiodModifier.XYPairs.X = 13.59, 17.6
        Cultivar PioneerP22T69R_MG22
          Command:
            [Phenology].Vegetative.Target.FixedValue = 328
            [Phenology].EarlyFlowering.Target.FixedValue = 106
            [Phenology].EarlyGrainFilling.Target.FractionofGrainfilling.FixedValue = 0.35
            [Phenology].LateGrainFilling.Target.EntireGrainfillPeriod.FixedValue = 580
            [Phenology].VegetativePhotoperiodModifier.XYPairs.X = 13.59, 17.6
            [Phenology].ReproductivePhotoperiodModifier.XYPairs.X = 13.59, 17.6
        Cultivar Pioneer92MGI_MG26
          Command:
            [Phenology].Vegetative.Target.FixedValue = 271
            [Phenology].EarlyFlowering.Target.FixedValue = 120
            [Phenology].EarlyGrainFilling.Target.FractionofGrainfilling.FixedValue = 0.125
            [Phenology].LateGrainFilling.Target.EntireGrainfillPeriod.FixedValue = 529
            [Phenology].VegetativePhotoperiodModifier.XYPairs.X = 13.77, 17.57
            [Phenology].ReproductivePhotoperiodModifier.XYPairs.X = 13.77, 17.57
        Cultivar PioneerP92Y75_MG27
          Command:
            [Phenology].Vegetative.Target.FixedValue = 328
            [Phenology].EarlyFlowering.Target.FixedValue = 106
            [Phenology].EarlyGrainFilling.Target.FractionofGrainfilling.FixedValue = 0.14
            [Phenology].LateGrainFilling.Target.EntireGrainfillPeriod.FixedValue = 499
            [Phenology].VegetativePhotoperiodModifier.XYPairs.X = 13.59, 17.6
            [Phenology].ReproductivePhotoperiodModifier.XYPairs.X = 13.59, 17.6
        Cultivar Macon_MG30
          Command:
            [Phenology].Vegetative.Target.FixedValue = 367
            [Phenology].EarlyFlowering.Target.FixedValue = 163
            [Phenology].EarlyGrainFilling.Target.FractionofGrainfilling.FixedValue = 0.175
            [Phenology].LateGrainFilling.Target.EntireGrainfillPeriod.FixedValue = 607
            [Phenology].VegetativePhotoperiodModifier.XYPairs.X = 14.05, 17.56
            [Phenology].ReproductivePhotoperiodModifier.XYPairs.X = 14.05, 17.56
        Cultivar PioneerP93M11_MG31
          Command:
            [Phenology].Vegetative.Target.FixedValue = 250
            [Phenology].EarlyFlowering.Target.FixedValue = 110
            [Phenology].EarlyGrainFilling.Target.FractionofGrainfilling.FixedValue = 0.30
            [Phenology].LateGrainFilling.Target.EntireGrainfillPeriod.FixedValue = 457
            [Phenology].VegetativePhotoperiodModifier.XYPairs.X = 13.4, 16.0
            [Phenology].ReproductivePhotoperiodModifier.XYPairs.X = 13.4, 16.0
            [Grain].MaximumNConc.FixedValue = 0.065
            [Shell].PotentialHarvestIndex.FixedValue = 0.5
            [Leaf].AreaLargestLeaf.FixedValue=0.013
        Cultivar Becks321NRR_MG32
          Command:
            [Phenology].Vegetative.Target.FixedValue = 272
            [Phenology].EarlyFlowering.Target.FixedValue = 117
            [Phenology].EarlyGrainFilling.Target.FractionofGrainfilling.FixedValue = 0.20
            [Phenology].LateGrainFilling.Target.EntireGrainfillPeriod.FixedValue = 522
            [Phenology].VegetativePhotoperiodModifier.XYPairs.X = 13.45, 18.0
            [Phenology].ReproductivePhotoperiodModifier.XYPairs.X = 13.45, 18.0
        Cultivar PioneerP932T16R_MG32
          Command:
            [Phenology].Vegetative.Target.FixedValue = 328
            [Phenology].EarlyFlowering.Target.FixedValue = 106
            [Phenology].EarlyGrainFilling.Target.FractionofGrainfilling.FixedValue = 0.40
            [Phenology].LateGrainFilling.Target.EntireGrainfillPeriod.FixedValue = 499
            [Phenology].VegetativePhotoperiodModifier.XYPairs.X = 13.59, 17.6
            [Phenology].ReproductivePhotoperiodModifier.XYPairs.X = 13.59, 17.6
        Cultivar Becks367NRR_MG37
          Command:
            [Phenology].Vegetative.Target.FixedValue = 267
            [Phenology].EarlyFlowering.Target.FixedValue = 112
            [Phenology].EarlyGrainFilling.Target.FractionofGrainfilling.FixedValue = 0.26
            [Phenology].LateGrainFilling.Target.EntireGrainfillPeriod.FixedValue = 506
            [Phenology].VegetativePhotoperiodModifier.XYPairs.X = 13.27, 17.2
            [Phenology].ReproductivePhotoperiodModifier.XYPairs.X = 13.27, 17.2
        Cultivar AsgrowAG4403_MG40
          Command:
            [Phenology].Vegetative.Target.FixedValue = 292
            [Phenology].EarlyFlowering.Target.FixedValue = 123
            [Phenology].EarlyGrainFilling.Target.FractionofGrainfilling.FixedValue = 0.30
            [Phenology].LateGrainFilling.Target.EntireGrainfillPeriod.FixedValue = 535
            [Phenology].VegetativePhotoperiodModifier.XYPairs.X = 13.09, 16.49
            [Phenology].ReproductivePhotoperiodModifier.XYPairs.X = 13.09, 16.49
        Cultivar HornbeckHBK4891_MG40: same as Replacements.Cotton.USA.AsgrowAG4403_MG40
        Cultivar Pioneer94B01_MG40
          Command:
            [Phenology].Vegetative.Target.FixedValue = 322
            [Phenology].EarlyFlowering.Target.FixedValue = 143
            [Phenology].EarlyGrainFilling.Target.FractionofGrainfilling.FixedValue = 0.30
            [Phenology].LateGrainFilling.Target.EntireGrainfillPeriod.FixedValue = 567
            [Phenology].VegetativePhotoperiodModifier.XYPairs.X = 13.05, 16.46
            [Phenology].ReproductivePhotoperiodModifier.XYPairs.X = 13.05, 16.46
        Cultivar PioneerP9504_MG50
          Command:
            [Phenology].Vegetative.Target.FixedValue = 404
            [Phenology].EarlyFlowering.Target.FixedValue = 112
            [Phenology].EarlyGrainFilling.Target.FractionofGrainfilling.FixedValue = 0.30
            [Phenology].LateGrainFilling.Target.EntireGrainfillPeriod.FixedValue = 505
            [Phenology].VegetativePhotoperiodModifier.XYPairs.X = 12.83, 16.13
            [Phenology].ReproductivePhotoperiodModifier.XYPairs.X = 12.83, 16.13
        Cultivar AsgrowAG5701_MG50
          Command:
            [Phenology].Vegetative.Target.FixedValue = 404
            [Phenology].EarlyFlowering.Target.FixedValue = 131
            [Phenology].EarlyGrainFilling.Target.FractionofGrainfilling.FixedValue = 0.30
            [Phenology].LateGrainFilling.Target.EntireGrainfillPeriod.FixedValue = 549
            [Phenology].VegetativePhotoperiodModifier.XYPairs.X = 12.83, 16.13
            [Phenology].ReproductivePhotoperiodModifier.XYPairs.X = 12.83, 16.13
        Cultivar Hutcheson_MG50
          Command:
            [Phenology].Vegetative.Target.FixedValue = 438
            [Phenology].EarlyFlowering.Target.FixedValue = 112
            [Phenology].EarlyGrainFilling.Target.FractionofGrainfilling.FixedValue = 0.30
            [Phenology].LateGrainFilling.Target.EntireGrainfillPeriod.FixedValue = 505
            [Phenology].VegetativePhotoperiodModifier.XYPairs.X = 12.58, 15.88
            [Phenology].ReproductivePhotoperiodModifier.XYPairs.X = 12.58, 15.88
        Cultivar NK622_MG60
          Command:
            [Phenology].Vegetative.Target.FixedValue = 436
            [Phenology].EarlyFlowering.Target.FixedValue = 93
            [Phenology].EarlyGrainFilling.Target.FractionofGrainfilling.FixedValue = 0.30
            [Phenology].LateGrainFilling.Target.EntireGrainfillPeriod.FixedValue = 467
            [Phenology].VegetativePhotoperiodModifier.XYPairs.X = 12.39, 15.61
            [Phenology].ReproductivePhotoperiodModifier.XYPairs.X = 12.39, 15.61
      CultivarFolder Generic
        Cultivar Generic_MG000
          Command:
            [Phenology].Vegetative.Target.FixedValue = 310
            [Phenology].EarlyFlowering.Target.FixedValue = 100
            [Phenology].EarlyGrainFilling.Target.FractionofGrainfilling.FixedValue = 0.475
            [Phenology].LateGrainFilling.Target.EntireGrainfillPeriod.FixedValue = 590
            [Phenology].VegetativePhotoperiodModifier.XYPairs.X = 14.6, 22.35
            [Phenology].ReproductivePhotoperiodModifier.XYPairs.X = 14.6, 22.35
        Cultivar Generic_MG00
          Command:
            [Phenology].Vegetative.Target.FixedValue = 320
            [Phenology].EarlyFlowering.Target.FixedValue = 100
            [Phenology].EarlyGrainFilling.Target.FractionofGrainfilling.FixedValue = 0.467
            [Phenology].LateGrainFilling.Target.EntireGrainfillPeriod.FixedValue = 600
            [Phenology].VegetativePhotoperiodModifier.XYPairs.X = 14.35, 21.11
            [Phenology].ReproductivePhotoperiodModifier.XYPairs.X = 14.35, 21.11
        Cultivar Generic_MG0
          Command:
            [Phenology].Vegetative.Target.FixedValue = 336
            [Phenology].EarlyFlowering.Target.FixedValue = 120
            [Phenology].EarlyGrainFilling.Target.FractionofGrainfilling.FixedValue = 0.422
            [Phenology].LateGrainFilling.Target.EntireGrainfillPeriod.FixedValue = 616
            [Phenology].VegetativePhotoperiodModifier.XYPairs.X = 14.1, 19.95
            [Phenology].ReproductivePhotoperiodModifier.XYPairs.X = 14.1, 19.95
        Cultivar Generic_MG1
          Command:
            [Phenology].Vegetative.Target.FixedValue = 340
            [Phenology].EarlyFlowering.Target.FixedValue = 120
            [Phenology].EarlyGrainFilling.Target.FractionofGrainfilling.FixedValue = 0.411
            [Phenology].LateGrainFilling.Target.EntireGrainfillPeriod.FixedValue = 632
            [Phenology].VegetativePhotoperiodModifier.XYPairs.X = 13.84, 18.77
            [Phenology].ReproductivePhotoperiodModifier.XYPairs.X = 13.84, 18.77
        Cultivar Generic_MG2
          Command:
            [Phenology].Vegetative.Target.FixedValue = 348
            [Phenology].EarlyFlowering.Target.FixedValue = 120
            [Phenology].EarlyGrainFilling.Target.FractionofGrainfilling.FixedValue = 0.386
            [Phenology].LateGrainFilling.Target.EntireGrainfillPeriod.FixedValue = 648
            [Phenology].VegetativePhotoperiodModifier.XYPairs.X = 13.59, 17.61
            [Phenology].ReproductivePhotoperiodModifier.XYPairs.X = 13.59, 17.61
        Cultivar Generic_MG3
          Command:
            [Phenology].Vegetative.Target.FixedValue = 380
            [Phenology].EarlyFlowering.Target.FixedValue = 120
            [Phenology].EarlyGrainFilling.Target.FractionofGrainfilling.FixedValue = 0.361
            [Phenology].LateGrainFilling.Target.EntireGrainfillPeriod.FixedValue = 664
            [Phenology].VegetativePhotoperiodModifier.XYPairs.X = 13.4, 16.91
            [Phenology].ReproductivePhotoperiodModifier.XYPairs.X = 13.4, 16.91
        Cultivar Generic_MG4
          Command:
            [Phenology].Vegetative.Target.FixedValue = 388
            [Phenology].EarlyFlowering.Target.FixedValue = 140
            [Phenology].EarlyGrainFilling.Target.FractionofGrainfilling.FixedValue = 0.324
            [Phenology].LateGrainFilling.Target.EntireGrainfillPeriod.FixedValue = 664
            [Phenology].VegetativePhotoperiodModifier.XYPairs.X = 13.1, 16.49
            [Phenology].ReproductivePhotoperiodModifier.XYPairs.X = 13.1, 16.49
        Cultivar Generic_MG5
          Command:
            [Phenology].Vegetative.Target.FixedValue = 396
            [Phenology].EarlyFlowering.Target.FixedValue = 160
            [Phenology].EarlyGrainFilling.Target.FractionofGrainfilling.FixedValue = 0.072
            [Phenology].LateGrainFilling.Target.EntireGrainfillPeriod.FixedValue = 696
            [Phenology].VegetativePhotoperiodModifier.XYPairs.X = 12.83, 16.13
            [Phenology].ReproductivePhotoperiodModifier.XYPairs.X = 12.83, 16.13
        Cultivar Generic_MG6
          Command:
            [Phenology].Vegetative.Target.FixedValue = 404
            [Phenology].EarlyFlowering.Target.FixedValue = 180
            [Phenology].EarlyGrainFilling.Target.FractionofGrainfilling.FixedValue = 0.056
            [Phenology].LateGrainFilling.Target.EntireGrainfillPeriod.FixedValue = 712
            [Phenology].VegetativePhotoperiodModifier.XYPairs.X = 12.58, 15.8
            [Phenology].ReproductivePhotoperiodModifier.XYPairs.X = 12.58, 15.8
        Cultivar Generic_MG7
          Command:
            [Phenology].Vegetative.Target.FixedValue = 416
            [Phenology].EarlyFlowering.Target.FixedValue = 200
            [Phenology].EarlyGrainFilling.Target.FractionofGrainfilling.FixedValue = 0.055
            [Phenology].LateGrainFilling.Target.EntireGrainfillPeriod.FixedValue = 728
            [Phenology].VegetativePhotoperiodModifier.XYPairs.X = 12.33, 15.46
            [Phenology].ReproductivePhotoperiodModifier.XYPairs.X = 12.33, 15.46
        Cultivar Generic_MG8
          Command:
            [Phenology].Vegetative.Target.FixedValue = 430
            [Phenology].EarlyFlowering.Target.FixedValue = 200
            [Phenology].EarlyGrainFilling.Target.FractionofGrainfilling.FixedValue = 0.054
            [Phenology].LateGrainFilling.Target.EntireGrainfillPeriod.FixedValue = 744
            [Phenology].VegetativePhotoperiodModifier.XYPairs.X = 12.07, 15.1
            [Phenology].ReproductivePhotoperiodModifier.XYPairs.X = 12.07, 15.1
        Cultivar Generic_MG9
          Command:
            [Phenology].Vegetative.Target.FixedValue = 460
            [Phenology].EarlyFlowering.Target.FixedValue = 200
            [Phenology].EarlyGrainFilling.Target.FractionofGrainfilling.FixedValue = 0.053
            [Phenology].LateGrainFilling.Target.EntireGrainfillPeriod.FixedValue = 748
            [Phenology].VegetativePhotoperiodModifier.XYPairs.X = 11.88, 14.82
            [Phenology].ReproductivePhotoperiodModifier.XYPairs.X = 11.88, 14.82
        Cultivar Generic_MG10
          Command:
            [Phenology].Vegetative.Target.FixedValue = 470
            [Phenology].EarlyFlowering.Target.FixedValue = 200
            [Phenology].EarlyGrainFilling.Target.FractionofGrainfilling.FixedValue = 0.053
            [Phenology].LateGrainFilling.Target.EntireGrainfillPeriod.FixedValue = 748
            [Phenology].VegetativePhotoperiodModifier.XYPairs.X = 11.78, 14.65
            [Phenology].ReproductivePhotoperiodModifier.XYPairs.X = 11.78, 14.65
    Report DailyReport: EventNames=[Clock].DoReport
      VariableNames:
        [Clock].Today
        [Clock].Today.DayOfYear
        [Cotton].Leaf.ThermalTime.ReproductiveGrowth.PPModifiedThermalTime.Stress as PPModifier
        [Cotton].Phenology.DaysAfterSowing
        [Cotton].Phenology.DaysAfterSowing as das
        [Cotton].Phenology.Stage
        [Cotton].Phenology.VegetativeThermalTime
        [Cotton].Phenology.ReproductiveThermalTime
        [Weather].MeanT
        [Weather].Radn
        [Weather].MaxT
        [Weather].MinT
        [Cotton].Arbitrator.DM.TotalFixationSupply
        sum([Cotton].Arbitrator.N.Fixation) as NFixed
        [Cotton].Arbitrator.DM.TotalPlantDemand
        [Cotton].Arbitrator.WDemand
        [Cotton].Arbitrator.WSupply
        [Cotton].Phenology.Vegetative.PhotoperiodEffect
        [Cotton].Phenology.CurrentStageName
        [Cotton].Phenology.CurrentStageName as stage_name
        [Cotton].Phenology.Photoperiod
        [Cotton].AboveGround.Wt
        [Cotton].AboveGround.N
        [Cotton].Leaf.NodeNumber
        [Cotton].Leaf.DMSupplyPhotosynthesis
        [Cotton].Leaf.AppearedCohortNo
        [Cotton].Leaf.DeadCohortNo
        [Cotton].Leaf.GreenCohortNo
        [Cotton].Leaf.Fw
        [Cotton].Leaf.Fn
        [Cotton].Leaf.Photosynthesis.FT
        [Cotton].Leaf.LAI
        [Cotton].Leaf.CoverGreen
        [Cotton].Leaf.CoverTotal
        [Cotton].Leaf.Live.Wt
        [Cotton].Leaf.Live.StructuralWt
        [Cotton].Leaf.Live.MetabolicWt
        [Cotton].Leaf.Allocated.MetabolicWt
        [Cotton].Leaf.Allocated.StructuralWt
        [Cotton].Leaf.Dead.StructuralWt
        [Cotton].Leaf.Dead.MetabolicWt
        [Cotton].Leaf.Live.N
        [Cotton].Leaf.Live.NConc
        [Cotton].Leaf.Dead.Wt
        [Cotton].Leaf.Dead.N
        [Cotton].Leaf.Dead.NConc
        [Cotton].Leaf.SpecificArea
        [Cotton].Leaf.Wt
        [Cotton].Leaf.Nconc
        [Cotton].Leaf.Senesced.Wt
        [Cotton].Stem.Wt
        [Cotton].Stem.Total.StructuralWt
        [Cotton].Stem.Live.StructuralWt
        [Cotton].Stem.Live.StructuralN
        [Cotton].Stem.N
        [Cotton].Stem.Nconc
        [Cotton].Shell.Wt
        [Cotton].Shell.Live.Wt
        [Cotton].Shell.N
        [Cotton].Shell.Nconc
        [Cotton].Grain.Wt
        [Cotton].Grain.N
        [Cotton].Grain.Nconc
        [Cotton].Grain.HarvestIndex
        [Cotton].Shell.Wt
        [Cotton].Shell.PodNumber
        [Cotton].Pod.Wt
        [Cotton].Pod.N
        [Cotton].Pod.NConc
        [Cotton].Nodule.NFixed
        [Cotton].Root.Wt
        sum([Soil].Nutrient.NO3.kgha) as TotalSoilNO3
        sum([Soil].Nutrient.NH4.kgha) as TotalSoilNH4
        sum([Soil].SoilWater.SWmm) as TotalSW
        [Soil].SoilWater.SW[1:3]
        [Cotton].Leaf.Height
        [Cotton].Root.Depth
        sum([Soil].SoilWater.ESW) as TotalESW
    Report HarvestReport: EventNames=[Cotton].Harvesting
      VariableNames:
        [Clock].Today
        [Cotton].Phenology.CurrentStageName
        [Cotton].Phenology.EmergenceDAS
        [Cotton].Phenology.FloweringDAS
        [Cotton].Phenology.MaturityDAS
        [Cotton].AboveGround.Wt
        [Cotton].Grain.Wt
        [Cotton].Pod.Wt as yield
        [Cotton].Grain.Wt as lint
  DataStore
    ExcelInput Emerald: FileNames=[emerald.xlsx]
      SheetNames=[Emerald_Phenology, Emerald_Yield, Emerald_Fruit, Emerald_SoilWater]
    ExcelInput Narrabri: FileNames=[narrabri.xlsx]; SheetNames=[Narrabri_Yield, Narrabri_Plant, Narrabri_SoilWater]
    ExcelInput NarrabriRose: FileNames=[narrabri_rose.xlsx]
      SheetNames=[NarrabriRose_Biomass, NarrabriRose_Phenology, NarrabriRose_SoilWater]
    PredictedObserved: PredictedTableName=DailyReport; ObservedTableName=Emerald_Fruit; FieldNameUsedForMatch=Clock.Today
  Folder Validation
    Memo
      The cotton model has been tested across a range of planting and agronomic conditions.  These include datasets covering a wide range of weather conditions (See graphs that follow) and agronomic factors (irrigation, fertiliser, sowing dates).
    Folder Australia
      Folder Emerald
        Memo
          These data [Timsina2007] were obtained from a field experiment conducted in 1999–2000 on a Hanwood loam soil at CSIRO Land and Water, Griffith, Australia.  Two indeterminate Cotton cultivars (Hooper and Stephens belonging to late maturity group [MG] 3 or early MG 4) were on 15 November, 8 December, and 6 January.
        Experiment Emerald_2013
          Factors
            Permutation
              Factor Sow
                CompositeFactor S1
                  Specifications:
                    [SowingRule].Script.SowingDate=2013-08-05
                    [SowingRule].Script.SowingRate=9.3
                    [SowingRule].Script.CultivarName=Sicot74
                    [IrrigateRule].Script.IrrigateDates=16-sep-2013,8-oct-2013,23-oct-2013,5-nov-2013,16-nov-2013,25-nov-2013,2-dec-2013,8-dec-2013,18-dec-2013
                    [FertiliseRule].Script.FertiliserDates=22-oct
                    [FertiliseRule].Script.Amount=110
                    [HarvestRule].Script.HarvestDate=2014-01-17
                CompositeFactor S2
                  Specifications:
                    [SowingRule].Script.SowingDate=2013-08-19
                    [SowingRule].Script.SowingRate=9.4
                    [SowingRule].Script.CultivarName=Sicot74
                    [IrrigateRule].Script.IrrigateDates=19-aug-2013,16-sep-2013,8-oct-2013,23-oct-2013,5-nov-2013,16-nov-2013,25-nov-2013,2-dec-2013,8-dec-2013,18-dec-2013
                    [FertiliseRule].Script.FertiliserDates=22-oct
                    [FertiliseRule].Script.Amount=110
                    [HarvestRule].Script.HarvestDate=2014-01-23
                CompositeFactor S3
                  Specifications:
                    [SowingRule].Script.SowingDate=2013-09-02
                    [SowingRule].Script.SowingRate=11.1
                    [SowingRule].Script.CultivarName=Sicot74
                    [IrrigateRule].Script.IrrigateDates=2-sep-2013,8-oct-2013,23-oct-2013,5-nov-2013,16-nov-2013,25-nov-2013,2-dec-2013,8-dec-2013,18-dec-2013,27-dec-2013
                    [FertiliseRule].Script.FertiliserDates=13-nov
                    [FertiliseRule].Script.Amount=101.2
                    [HarvestRule].Script.HarvestDate=2014-02-01
                CompositeFactor S4
                  Specifications:
                    [SowingRule].Script.SowingDate=2013-09-15
                    [SowingRule].Script.SowingRate=10.1
                    [SowingRule].Script.CultivarName=Sicot74
                    [IrrigateRule].Script.IrrigateDates=16-sep-2013,8-oct-2013,23-oct-2013,9-nov-2013,16-nov-2013,25-nov-2013,2-dec-2013,8-dec-2013,18-dec-2013,27-dec-2013,10-jan-2014
                    [FertiliseRule].Script.FertiliserDates=13-nov
                    [FertiliseRule].Script.Amount=101.2
                    [HarvestRule].Script.HarvestDate=2014-02-16
          Simulation Emerald_2013Base
            Clock: Start=2013-07-01; End=2014-04-30
            Weather: FileName=EmeraldAP+field.met
            Summary summaryfile
            SoilArbitrator Soil Arbitrator
            Zone paddock: Area=1; Slope=0; AspectAngle=0; Altitude=50
              Soil: ASCOrder=Vertosol; ASCSubOrder=Black; SoilType=Clay; Site=Emerald; NearestTown=Emerald; Region=Central Highlands; State=Queensland; Country=Australia; ApsoilNumber=911; Latitude=-23.5211; Longitude=148.123; DataSource=Collected by Brett Cocks (CES) for NVT.
                Physical
                  Thickness  BD     AirDry  LL15   DUL    SAT
                  150        1.3    0.062   0.124  0.384  0.434
                  150        1.51   0.118   0.148  0.379  0.429
                  300        1.59   0.153   0.153  0.353  0.403
                  300        1.54   0.165   0.165  0.365  0.415
                  300        1.416  0.232   0.232  0.387  0.437
                  300        1.394  0.291   0.291  0.401  0.451
                  300        1.407  0.349   0.349  0.396  0.446
                  SoilCrop WheatSoil: LL=[0.124, 0.148, 0.153, 0.165, 0.232, 0.291, 0.349]; KL=[0.06, 0.06, 0.06, 0.04, 0.04, 0.02, 0.01]; XF=[1, 1, 1, 1, 1, 1, 1]
                    LL source: Field measured and checked for sensibility
                  SoilCrop CottonSoil: LL=[0.124, 0.148, 0.153, 0.195, 0.35, 0.399, 0.395]; KL=[0.01, 0.06, 0.06, 0.06, 0.04, 0.02, 0.01]; XF=[1, 1, 1, 1, 1, 1, 1]
                SoilWater: SummerDate=1-Nov; SummerU=6; SummerCona=3.5; WinterDate=1-Apr; WinterU=4; WinterCona=3; DiffusConst=40; DiffusSlope=16; Salb=0.12; CN2Bare=73; CNRed=20; CNCov=0.8; max_pond=0; Thickness=[150, 150, 300, 300, 300, 300, 300]; SWCON=[0.3, 0.3, 0.3, 0.3, 0.3, 0.3, 0.3]; PrecipitationInterception=0
                Nutrient
                  DirectedGraphInfo={Nodes=[{Name=Inert, OutlineColour=Black}, {Name=SurfaceResidue, OutlineColour=Black}, {Name=FOMLignin, OutlineColour=Black}, {Name=FOMCellulose, OutlineColour=Black}, {Name=FOMCarbohydrate, OutlineColour=Black}, {Name=Microbial, OutlineColour=Black}, {Name=Humic, OutlineColour=Black}, {Name=Urea, OutlineColour=Black}, {Name=NO3, OutlineColour=Black}, {Name=NH4, OutlineColour=Black}, {Name=Atmosphere, OutlineColour=White}], Arcs=[{SourceName=SurfaceResidue, DestinationName=Microbial}, {SourceName=SurfaceResidue, DestinationName=Humic}, {SourceName=FOMLignin, DestinationName=Microbial}, {SourceName=FOMLignin, DestinationName=Humic}, {SourceName=FOMCellulose, DestinationName=Microbial}, {SourceName=FOMCellulose, DestinationName=Humic}, {SourceName=FOMCarbohydrate, DestinationName=Microbial}, {SourceName=FOMCarbohydrate, DestinationName=Humic}, {SourceName=Microbial, DestinationName=Microbial}, {SourceName=Microbial, DestinationName=Humic}, {SourceName=Humic, DestinationName=Microbial}, {SourceName=Urea, DestinationName=NH4}, {SourceName=NO3, DestinationName=Atmosphere}, {SourceName=NH4, DestinationName=NO3}]}
                CERESSoilTemperature
                Organic: FOMCNRatio=40
                  Thickness  Carbon  SoilCNRatio  FBiom  FInert  FOM
                  150        1.24    12           0.04   0.4     347.129
                  150        1.24    12           0.02   0.5     270.344
                  300        1.25    12           0.02   0.7     163.972
                  300        1.1     12           0.02   1       99.4541
                  300        0.71    12           0.01   1       60.322
                  300        0.34    12           0.01   1       36.5871
                  300        0.34    12           0.01   1       22.1912
                Chemical
                  Thickness  NO3N  NH4N      PH   CL     EC
                  150        15    0.923077  7.7  30     0.2
                  150        4.6   0.12936   8.3  40.3   0.3
                  300        2.5   0.261635  8.5  26     0.5
                  300        2.1   0.27619   8.6  138.2  0.8
                  300        0     0.323446  8.2  485.4  1
                  300        0     0.346485  7.6  818.4  1.3
                  300        0     0.348733  7.7  947.2  1.3
                InitialWater: PercentMethod=0; FractionFull=0.8; RelativeTo=LL15
                Sample InitialNitrogen: Thickness=[150, 150, 300, 300, 300, 300, 300]; SWUnits=Volumetric; OCUnits=Total; PHUnits=Water
              SurfaceOrganicMatter: InitialResidueName=cotton; InitialResidueType=cotton; InitialResidueMass=1000; InitialStandingFraction=0; InitialCPR=0; InitialCNR=80; FractionFaecesAdded=1
              MicroClimate: a_interception=0; b_interception=1; c_interception=0; d_interception=0; soil_albedo=0.3; SoilHeatFluxFraction=0; MinimumHeightDiffForNewLayer=0; NightInterceptionFraction=0; ReferenceHeight=0
              Irrigation
              Fertiliser
              Plant Cotton: CropType=Cotton; IsAlive=false; IsEnding=false; DaysAfterEnding=0
              Manager Fertilise at sowing
                Crop =
                FertiliserType = UreaN
                Amount = 160
```csharp
using System;
using Models.Core;
using Models.PMF;
namespace Models
{
    [Serializable]
    public class Script : Model
    {
        [Link] Clock Clock;
        [Link] Fertiliser Fertiliser;
        
        [Description("Crop to be fertilised")]
        public IPlant Crop { get; set; }

        [Description("Type of fertiliser to apply? ")] 
        public Fertiliser.Types FertiliserType { get; set; }
    
        [Description("Amount of fertiliser to be applied (kg/ha)")]
        public double Amount { get; set; }
        
        [EventSubscribe("Sowing")]
        private void OnSowing(object sender, EventArgs e)
        {
            Model crop = sender as Model;
            if (Crop != null && crop.Name.ToLower() == (Crop as IModel).Name.ToLower())
                Fertiliser.Apply(Amount: Amount, Type: FertiliserType);
        }
    }
}
```
              Manager SowingRule
                RowSpacing = 1000
                SowingDepth = 50
                SowingRate = 30
                CultivarName = Ames_P932T16R_32MG
                SowingDate = 06/10/2001 00:00:00
```csharp
        using System;
        using Models.Core;
        using Models.PMF;
        using APSIM.Shared.Utilities;
        
        namespace Models
        {
           [Serializable] 
           [System.Xml.Serialization.XmlInclude(typeof(Model))]
            public class Script : Model
            {      
               [Link] Plant Cotton;
               [Link] Clock Clock;

               [Description("Spacing (mm) between rows")]
               public double RowSpacing { get; set; }
               [Description("Depth (mm) Grains are planted")]
               public double SowingDepth { get; set; }
               [Description("Seeds sown (/m2)")]
               public double SowingRate { get; set; }
               [Description("Cultivar")]
               [Display(Type=DisplayType.CultivarName)]
               public string CultivarName { get; set; }
               [Description("Sowing Date")]
               public DateTime SowingDate { get; set; }

               [EventSubscribe("DoManagement")]
               private void OnDoManagement(object sender, EventArgs e)
               {
                if (Clock.Today.Date == SowingDate)
                    Cotton.Sow(population:SowingRate, cultivar:CultivarName, depth:SowingDepth, rowSpacing:RowSpacing, budNumber:1);
               }
            }
        }
```
              Manager IrrigateRule
                IrrigateDates = 24-jan
                Amount = 100
                Depth = 0
                Efficiency = 1
                WillRunoff = False
```csharp
using System;
using Models.Core;
using Models.PMF;
using APSIM.Shared.Utilities;
namespace Models
{
    [Serializable]
    public class Script : Model
    {
        [Link] Clock Clock;
        [Link] Irrigation Irrigation;
        
        [Separator("A component to apply irrigation on one or more dates on every year of the simulation")]

        [Description("Enter the irrigation dates as dd-mmm with comma separation (any year information entered will be ignored)")] 
        public string[] IrrigateDates { get; set; }
        
        [Description("Amount of irrigation to be applied (mm)")] 
        public double Amount { get; set; }
        
        [Description("Depth in the soil to apply the  irrigation (mm)")] 
        public double Depth { get; set; }
        
        [Description("Efficiency of irrigation (0-1)")] 
        public double Efficiency { get; set; }
        
        [Description("Will the irrigation runoff?")] 
        public bool WillRunoff { get; set; }
        
        [EventSubscribe("DoManagement")]
        private void OnDoManagement(object sender, EventArgs e)
        {
            foreach (string ddMMM in IrrigateDates)
            {
                if (DateUtilities.DatesEqual(ddMMM, Clock.Today))
                    Irrigation.Apply(amount: Amount, depth: Depth, efficiency: Efficiency, willRunoff: WillRunoff);
            }
        }
    }
}
```
              Manager FertiliseRule
                FertiliserType = UreaN
                FertiliserDates = 24-apr
                Amount = 160
                AmountType = True
```csharp
using System;
using Models.Core;
using Models.PMF;
using APSIM.Shared.Utilities;
namespace Models
{
    [Serializable]
    public class Script : Model
    {
        [Link] Clock Clock;
        [Link] Fertiliser Fertiliser;
        
        [Separator("A component to apply fertiliser on one or more dates on every year of the simulation")]

        [Description("Type of fertiliser to apply? ")] 
        public Fertiliser.Types FertiliserType { get; set; }

        [Description("Enter the fertilisation dates as dd-mmm with comma separation (any year information entered will be ignored): ")] 
        public string[] FertiliserDates { get; set; } 

        [Description("Amount of fertiliser to be applied (kg /ha)")] 
        public double Amount { get; set; }

        [Description("Is the above amount to be applied each time? (yes/ticked)? Or is it the total annual amount across all dates (no/unticked)")] 
        public bool AmountType { get; set; }
        
        [EventSubscribe("DoManagement")]
        private void OnDoManagement(object sender, EventArgs e)
        {
            foreach (string ddMMM in FertiliserDates)
            {
                if (DateUtilities.DatesEqual(ddMMM, Clock.Today))
                {
                    if (AmountType)
                        Fertiliser.Apply(Amount: Amount, Type: FertiliserType);
                    else
                        Fertiliser.Apply(Amount: Amount / FertiliserDates.Length, Type: FertiliserType);
                }
            }
        }
    }
}
```
              Manager HarvestRule
                HarvestDate = 04/04/2000 00:00:00
```csharp
using System;
using Models.Core;
using System.Collections.Generic;
using System.Text;
using Models.Soils;
using Models.Soils.Nutrients;
using Models.PMF;
using Models;
using System.Xml.Serialization;
using APSIM.Shared.Utilities;

namespace Models
{
    [Serializable] 
    public class Script : Model
    {      
        [Link] Plant Cotton;          
        [Link] Clock Clock;

                    
        [Description("Harvest Date")]
        public DateTime HarvestDate { get; set; }

        [EventSubscribe("Commencing")]
        private void OnSimulationCommencing(object sender, EventArgs e)
        {
        }       
        
        [EventSubscribe("DoManagement")]
        private void OnDoManagement(object sender, EventArgs e)
        {
           if (Clock.Today.Date == HarvestDate)
           {
           Cotton.Harvest();
           Cotton.EndCrop();
           }
        }
        
        [EventSubscribe("DoManagementCalculations")]
        private void OnDoManagementCalculations(object sender, EventArgs e)
        {
            
        }
    }
}
```
              Report DailyReport: EventNames=[Clock].DoReport
                VariableNames:
                  [Clock].Today
                  [DiagnosticsVariables].Script.AccumPlantN
                  [DiagnosticsVariables].Script.AccumMineralisation
                  [DiagnosticsVariables].Script.AccumDenit
                  [DiagnosticsVariables].Script.AccumFert
                  [DiagnosticsVariables].Script.AccumLeach
                  [DiagnosticsVariables].Script.AccumDetach
                  [DiagnosticsVariables].Script.DeltaSoilOMN
                  [DiagnosticsVariables].Script.DeltaSurfaceOMN
                  [DiagnosticsVariables].Script.DeltaSoilMineralN
                  [Cotton].Root.NSupply
                  [Soil].SoilWater.Eo
                  [Soil].SoilWater.Es
                  [DiagnosticsVariables].Script.SWC
                  [DiagnosticsVariables].Script.DUL
                  [Soil].SoilWater.Drainage
                  [Soil].SoilWater.Runoff
                  [DiagnosticsVariables].Script.OutFlowLat
                  [Soil].SoilWater.pond
                  [DiagnosticsVariables].Script.AccumEO
                  [DiagnosticsVariables].Script.AccumEP
                  [DiagnosticsVariables].Script.AccumES
                  [DiagnosticsVariables].Script.AccumDrainage
                  [DiagnosticsVariables].Script.AccumRunoff
                  [DiagnosticsVariables].Script.AccumRainfall
                  [DiagnosticsVariables].Script.AccumIrrigation
                  [DiagnosticsVariables].Script.AccumOutflowLat
                  [DiagnosticsVariables].Script.SoilWaterDeficit
                  [Cotton].Grain.Live.Wt
                  [Cotton].Shell.Live.Wt
                  [Cotton].Stem.Live.Wt
                  [Cotton].Stem.Live.Wt
                  [Cotton].Grain.Live.N
                  [Cotton].Shell.Live.N
                  [Cotton].Leaf.Live.Wt
                  [Cotton].Root.Live.Wt
                  [Cotton].Leaf.Live.N
                  [Cotton].Root.Live.N
                  [Cotton].Leaf.Live.NConc
                  [Cotton].Root.Live.NConc
                  [Cotton].Root.WaterSupply
                  [Cotton].Root.WaterUptake
                  [Cotton].Leaf.Transpiration
                  [Cotton].Leaf.WaterDemand
                  [Cotton].Root.Depth
                  [Cotton].Leaf.CoverTotal
                  [Cotton].Leaf.CoverDead
                  [Cotton].Leaf.LAI
                  [Cotton].Leaf.Height
                  [Cotton].Leaf.PotentialBiomass
                  [Soil].SoilWater.SWmm
                  [Soil].Nutrient.NO3.kgha
                  [DiagnosticsVariables].Script.SoilNitrogenContent
                  [Cotton].Arbitrator.N.TotalPlantDemand
                  [MicroClimate].net_radn
                  [MicroClimate].peta
                  [MicroClimate].petr
                  [DiagnosticsVariables].Script.FomN
                  [DiagnosticsVariables].Script.HumN
                  [DiagnosticsVariables].Script.BiomN
                  [DiagnosticsVariables].Script.DltNMinRes
                  [DiagnosticsVariables].Script.DltNMinTot
                  [Cotton].Leaf.Fw
                  [Cotton].Leaf.Fn
                  [Cotton].Phenology.CurrentPhaseName
                  [Cotton].Phenology.Stage
                  [Cotton].Pod.Wt
                  [Cotton].Pod.N
                  [Cotton].Structure.LeafTipsAppeared
                  [Cotton].Structure.MainStemPrimordiaNo
                  [Cotton].Leaf.CohortArea[1]
                  [Cotton].Leaf.CohortArea[2]
                  [Cotton].Leaf.CohortArea[3]
                  [Cotton].Leaf.CohortArea[4]
                  [Cotton].Leaf.CohortArea[5]
                  [Cotton].Leaf.CohortArea[6]
                  [Cotton].Leaf.CohortArea[7]
                  [Cotton].Leaf.CohortArea[8]
                  [Cotton].Leaf.CohortArea[9]
                  [Cotton].Leaf.CohortArea[10]
                  [Cotton].Leaf.CohortArea[11]
                  [Cotton].Leaf.CohortArea[12]
                  [Cotton].Leaf.CohortArea[13]
                  [Cotton].Leaf.CohortArea[14]
                  [Cotton].Leaf.CohortArea[15]
                  [Cotton].Leaf.AppearedCohortNo
                  [Cotton].Leaf.DeadCohortNo
                  [Cotton].AboveGround.Wt
                  [Cotton].Phenology.Stage
                  [Cotton].Structure.MainStemPrimordiaNo
                  [Cotton].Phenology.NFF
                  [SoybeanHarvestRule].Script.FinalTag
                  [Cotton].Grain.NumberFunction
                  [Cotton].Shell.PodNumber
                  [Cotton].Phenology.FN
                  [Cotton].Phenology.FN.TotalNodes
                  [Cotton].Phenology.FN.VegetativeNodes
              Report HarvestReport: EventNames=[Cotton].Harvesting
                VariableNames:
                  [Clock].Today
                  [Cotton].Structure.MainStemPrimordiaNo
                  [Cotton].Phenology.NFF
                  [Cotton].Script.FinalTag
        Experiment Emerald_2014
          Factors
            Permutation
              Factor Sow
                CompositeFactor S1
                  Specifications:
                    [SowingRule].Script.SowingDate=2014-08-03
                    [SowingRule].Script.SowingRate=10
                    [SowingRule].Script.CultivarName=Sicot74
                    [IrrigateRule].Script.IrrigateDates=14-oct-2014,30-oct-2014,13-nov-2014,19-nov-2014,4-dec-2014,22-dec-2014
                    [FertiliseRule].Script.FertiliserDates=29-oct
                    [FertiliseRule].Script.Amount=110
                    [HarvestRule].Script.HarvestDate=2015-01-15
                CompositeFactor S2
                  Specifications:
                    [SowingRule].Script.SowingDate=2014-08-14
                    [SowingRule].Script.SowingRate=10
                    [SowingRule].Script.CultivarName=Sicot74
                    [IrrigateRule].Script.IrrigateDates=14-oct-2014,30-oct-2014,13-nov-2014,19-nov-2014,4-dec-2014,22-dec-2014,2-jan-2015
                    [FertiliseRule].Script.FertiliserDates=29-oct
                    [FertiliseRule].Script.Amount=110
                    [HarvestRule].Script.HarvestDate=2015-01-21
                CompositeFactor S3
                  Specifications:
                    [SowingRule].Script.SowingDate=2014-09-02
                    [SowingRule].Script.SowingRate=10
                    [SowingRule].Script.CultivarName=Sicot74
                    [IrrigateRule].Script.IrrigateDates=2-sep-2014,30-oct-2014,13-nov-2014,19-nov-2014,4-dec-2014,22-dec-2014,2-jan-2015
                    [FertiliseRule].Script.FertiliserDates=12-nov
                    [FertiliseRule].Script.Amount=110
                    [HarvestRule].Script.HarvestDate=2015-02-01
                CompositeFactor S4
                  Specifications:
                    [SowingRule].Script.SowingDate=2014-09-15
                    [SowingRule].Script.SowingRate=10
                    [SowingRule].Script.CultivarName=Sicot74
                    [IrrigateRule].Script.IrrigateDates=15-sep-2014,30-oct-2014,13-nov-2014,4-dec-2014,22-dec-2014,2-jan-2015,12-jan-2015
                    [FertiliseRule].Script.FertiliserDates=12-nov
                    [FertiliseRule].Script.Amount=110
                    [HarvestRule].Script.HarvestDate=2015-02-11
          Simulation Emerald_2014Base
            Clock: Start=2014-07-01; End=2015-04-30
            Weather: FileName=EmeraldAP+field.met
            Summary summaryfile
            SoilArbitrator Soil Arbitrator
            Zone paddock: same as Validation.Australia.Emerald.Emerald_2013.Emerald_2013Base.paddock
        Experiment Emerald_2015
          Factors
            Permutation
              Factor Sow
                CompositeFactor S1
                  Specifications:
                    [SowingRule].Script.SowingDate=2015-08-01
                    [SowingRule].Script.SowingRate=9.6
                    [SowingRule].Script.CultivarName=Sicot74
                    [IrrigateRule].Script.IrrigateDates=30-aug-2015,3-oct-2015,17-oct-2015,28-oct-2015,19-nov-2015,29-nov-2015,9-dec-2015,18-dec-2015,28-dec-2015
                    [FertiliseRule].Script.FertiliserDates=29-aug
                    [FertiliseRule].Script.Amount=101.2
                    [HarvestRule].Script.HarvestDate=2016-01-25
                CompositeFactor S2
                  Specifications:
                    [SowingRule].Script.SowingDate=2015-08-21
                    [SowingRule].Script.SowingRate=11.3
                    [SowingRule].Script.CultivarName=Sicot74
                    [IrrigateRule].Script.IrrigateDates=21-aug-2015,17-sep-2015,17-oct-2015,28-oct-2015,19-nov-2015,29-nov-2015,9-dec-2015,18-dec-2015,28-dec-2015
                    [FertiliseRule].Script.FertiliserDates=16-sep
                    [FertiliseRule].Script.Amount=101.2
                    [HarvestRule].Script.HarvestDate=2016-01-28
                CompositeFactor S3
                  Specifications:
                    [SowingRule].Script.SowingDate=2015-09-15
                    [SowingRule].Script.SowingRate=9.5
                    [SowingRule].Script.CultivarName=Sicot74
                    [IrrigateRule].Script.IrrigateDates=15-sep-2015,22-oct-2015,17-nov-2015,28-nov-2015,10-dec-2015,16-dec-2015,28-dec-2015,14-jan-2016
                    [FertiliseRule].Script.FertiliserDates=21-oct
                    [FertiliseRule].Script.Amount=101.2
                    [HarvestRule].Script.HarvestDate=2016-02-16
          Simulation Emerald_2015Base
            Clock: Start=2015-07-01; End=2016-04-30
            Weather: FileName=EmeraldAP+field.met
            Summary summaryfile
            SoilArbitrator Soil Arbitrator
            Zone paddock: Area=1; Slope=0; AspectAngle=0; Altitude=50
              Soil: same as Validation.Australia.Emerald.Emerald_2013.Emerald_2013Base.paddock.Soil
              SurfaceOrganicMatter: InitialResidueName=mungbeans; InitialResidueType=lentil; InitialResidueMass=500; InitialStandingFraction=0; InitialCPR=0; InitialCNR=80; FractionFaecesAdded=1
              MicroClimate: a_interception=0; b_interception=1; c_interception=0; d_interception=0; soil_albedo=0.3; SoilHeatFluxFraction=0; MinimumHeightDiffForNewLayer=0; NightInterceptionFraction=0; ReferenceHeight=0
              Irrigation
              Fertiliser
              Plant Cotton: CropType=Cotton; IsAlive=false; IsEnding=false; DaysAfterEnding=0
              Manager Fertilise at sowing
                Crop =
                FertiliserType = UreaN
                Amount = 220
                script: same as in Validation.Australia.Emerald.Emerald_2013.Emerald_2013Base.paddock.Fertilise at sowing
              Manager SowingRule: same as Validation.Australia.Emerald.Emerald_2013.Emerald_2013Base.paddock.SowingRule
              Manager IrrigateRule: same as Validation.Australia.Emerald.Emerald_2013.Emerald_2013Base.paddock.IrrigateRule
              Manager FertiliseRule: same as Validation.Australia.Emerald.Emerald_2013.Emerald_2013Base.paddock.FertiliseRule
              Manager HarvestRule: same as Validation.Australia.Emerald.Emerald_2013.Emerald_2013Base.paddock.HarvestRule
              Report DailyReport: same as Validation.Australia.Emerald.Emerald_2013.Emerald_2013Base.paddock.DailyReport
              Report HarvestReport: EventNames=[Cotton].Harvesting
                VariableNames:
                  [Clock].Today
                  [Cotton].Structure.MainStemPrimordiaNo
                  [Cotton].Phenology.NFF
                  [Cotton].Script.FinalTag
        Experiment Emerald_2016
          Factors
            Permutation
              Factor Sow
                CompositeFactor S1
                  Specifications:
                    [SowingRule].Script.SowingDate=2016-08-01
                    [SowingRule].Script.SowingRate=10.6
                    [SowingRule].Script.CultivarName=Sicot746
                    [IrrigateRule].Script.IrrigateDates=15-sep-2016,12-oct-2016,28-oct-2016,10-nov-2016,20-nov-2016,30-nov-2016,7-dec-2016,16-dec-2016
                    [FertiliseRule].Script.FertiliserDates=29-sep
                    [FertiliseRule].Script.Amount=101.2
                    [HarvestRule].Script.HarvestDate=2017-01-27
                CompositeFactor S2
                  Specifications:
                    [SowingRule].Script.SowingDate=2016-08-21
                    [SowingRule].Script.SowingRate=11.3
                    [SowingRule].Script.CultivarName=Sicot746
                    [IrrigateRule].Script.IrrigateDates=19-aug-2016,15-sep-2016,12-oct-2016,28-oct-2016,10-nov-2016,20-nov-2016,30-nov-2016,7-dec-2016,16-dec-2016,28-dec-2016
                    [FertiliseRule].Script.FertiliserDates=29-sep
                    [FertiliseRule].Script.Amount=101.2
                    [HarvestRule].Script.HarvestDate=2017-01-30
                CompositeFactor S3
                  Specifications:
                    [SowingRule].Script.SowingDate=2016-09-15
                    [SowingRule].Script.SowingRate=11.9
                    [SowingRule].Script.CultivarName=Sicot746
                    [IrrigateRule].Script.IrrigateDates=15-sep-2016,28-oct-2016,10-nov-2016,20-nov-2016,30-nov-2016,7-dec-2016,16-dec-2016,30-dec-2016,16-jan-2017
                    [FertiliseRule].Script.FertiliserDates=21-oct
                    [FertiliseRule].Script.Amount=101.2
                    [HarvestRule].Script.HarvestDate=2017-02-08
          Simulation Emerald_2016Base
            Clock: Start=2016-07-01; End=2017-04-30
            Weather: FileName=EmeraldAP+field.met
            Summary summaryfile
            SoilArbitrator Soil Arbitrator
            Zone paddock: Area=1; Slope=0; AspectAngle=0; Altitude=50
              Soil: same as Validation.Australia.Emerald.Emerald_2013.Emerald_2013Base.paddock.Soil
              SurfaceOrganicMatter: InitialResidueName=cotton; InitialResidueType=cotton; InitialResidueMass=1000; InitialStandingFraction=0; InitialCPR=0; InitialCNR=80; FractionFaecesAdded=1
              MicroClimate: a_interception=0; b_interception=1; c_interception=0; d_interception=0; soil_albedo=0.3; SoilHeatFluxFraction=0; MinimumHeightDiffForNewLayer=0; NightInterceptionFraction=0; ReferenceHeight=0
              Irrigation
              Fertiliser
              Plant Cotton: CropType=Cotton; IsAlive=false; IsEnding=false; DaysAfterEnding=0
              Manager Fertilise at sowing: same as Validation.Australia.Emerald.Emerald_2015.Emerald_2015Base.paddock.Fertilise at sowing
              Manager SowingRule: same as Validation.Australia.Emerald.Emerald_2013.Emerald_2013Base.paddock.SowingRule
              Manager IrrigateRule: same as Validation.Australia.Emerald.Emerald_2013.Emerald_2013Base.paddock.IrrigateRule
              Manager FertiliseRule: same as Validation.Australia.Emerald.Emerald_2013.Emerald_2013Base.paddock.FertiliseRule
              Manager HarvestRule: same as Validation.Australia.Emerald.Emerald_2013.Emerald_2013Base.paddock.HarvestRule
              Report DailyReport: same as Validation.Australia.Emerald.Emerald_2013.Emerald_2013Base.paddock.DailyReport
              Report HarvestReport: EventNames=[Cotton].Harvesting
                VariableNames:
                  [Clock].Today
                  [Cotton].Structure.MainStemPrimordiaNo
                  [Cotton].Phenology.NFF
                  [Cotton].Script.FinalTag
      Folder Narrabri
        Memo
          Bit of confusion over whether this variety is Sicot_71_BRF or Sicot_70_BRF

          The "Deficit OZCOT inputs - 0809.xls" management sheet says Sicot 70 BRF

          but the ozcot Varity.inp file says Sicot 71 BRF

          The pre sowing fertiliser application on 12 Sep 2008 was done as Anhydrous Amonia (it has been converted to NO3 already)

          nb. Should the fertilser depth be changed from 50mm because it was applied as Anhydrous as a gas injected into the soil?

          I set the FASWDepth in the IrrigateRule to 1 meter.

          Not sure if I should have set this to the full depth but did not want there to be no water in the surface layers when plant was young but water down below so irrigation not occuring.

          I can not find a Harvest Date in any of the management files. Perhaps just use a "Harvest when ripe" rule?
          Because I don't know the harvest date, I can't set the dates for the clock.
          I just have used 1 June to 1 June next year as the clock dates until I have better information.

          To get the starting nitrogen in the soil, I had to reverse the "initial nitrogen uptake" value from the agron.inp file used for the ozcot simulation run.
          I did this by using the "Nitrogen uptake by cotton with soilN conversion.xls" file and typing in numbers until I got a initial nitrogen uptake of 92 which is the value in the agron.inp files.
          See "Nitrogen uptake by cotton with soilN conversion - init nitro using uptake value in agron file.xls" located in Dropbox folder.
          I have not put any initial nitrogen in the layers below the top 2 layers. Not sure if this is correct by the "pre sowing fertiliser" should wash down into lower layers with irrigation and rain.

          I did not use the soilwat.inp file for parameterising the SoilWater properties of the soil. I just left the "Grey Vertosol (Myall Vale No097)" as it was.
          This is a pretty well used soil in Apsim and therefore its parameters are probably more customised to the Apsim model than attempting to convert the different soil variables specified in the ozcot file to their equivalent soil variables in Apsim.

          Had no "Surface Organic Matter" information so just left it as it was. Need to check the Surface Organic Matter!!!!!
        Experiment Narrabri_2006
          Factors
            Permutation
              Factor Sow
                CompositeFactor Blue
                  Specifications:
                    [IrrigateRule].Script.IrrigateDates=271,335,349,363,8,17,23,30,36,50,55,73
                    [HarvestRule].Script.HarvestDate=2014-01-17
                CompositeFactor Green
                  Specifications:
                    [IrrigateRule].Script.IrrigateDates=271,335,349,8,18,29,39,55
                    [HarvestRule].Script.HarvestDate=2014-01-17
                CompositeFactor Red
                  Specifications:
                    [IrrigateRule].Script.IrrigateDates=271,342,363,17,25,33,50,55
                    [HarvestRule].Script.HarvestDate=2014-01-17
                CompositeFactor Grey
                  Specifications:
                    [IrrigateRule].Script.IrrigateDates=271,355,17,36
                    [HarvestRule].Script.HarvestDate=2014-01-17
          Simulation Narrabri_2006Base
            Weather: FileName=Narrabri_2006-07.met
            Clock: Start=2006-06-01; End=2007-06-01
            Summary summaryfile
            SoilArbitrator Soil Arbitrator
            Zone paddock: Area=1; Slope=0; AspectAngle=0; Altitude=50
              SurfaceOrganicMatter: InitialResidueName=cotton; InitialResidueType=cotton; InitialResidueMass=1000; InitialStandingFraction=0; InitialCPR=0; InitialCNR=80; FractionFaecesAdded=1
              Soil: ASCOrder=Vertosol; ASCSubOrder=Grey; SoilType=Clay; Site=Myall Vale; NearestTown=Narrabri, NSW 2390; Region=North West Slopes and Plains; State=New South Wales; Country=Australia; NaturalVegetation=Grasslands; ApsoilNumber=97; Latitude=-30.203; Longitude=149.593; LocationAccuracy=+/- 20m; DataSource=CSIRO Plant Industry, Myall Vale (D Richards)
                Physical
                  Thickness  BD    AirDry  LL15  DUL   SAT
                  150        1.31  0.11    0.22  0.43  0.48
                  150        1.26  0.176   0.22  0.44  0.49
                  300        1.36  0.22    0.22  0.41  0.46
                  300        1.39  0.22    0.22  0.4   0.45
                  300        1.44  0.22    0.22  0.38  0.43
                  300        1.45  0.22    0.22  0.37  0.42
                  300        1.46  0.22    0.22  0.37  0.42
                  SoilCrop WheatSoil: LL=[0.22, 0.22, 0.23, 0.25, 0.28, 0.3, 0.36]; KL=[0.06, 0.06, 0.06, 0.04, 0.04, 0.02, 0.01]; XF=[1, 1, 1, 1, 1, 1, 1]
                    LL source: Field measured and checked for sensibility
                  SoilCrop BarleySoil: LL=[0.22, 0.22, 0.23, 0.25, 0.28, 0.3, 0.36]; KL=[0.07, 0.07, 0.07, 0.05, 0.05, 0.03, 0.02]; XF=[1, 1, 1, 1, 1, 1, 1]
                    LL source: Estimated based on local knowledge
                  SoilCrop ChickpeaSoil: LL=[0.22, 0.22, 0.25, 0.28, 0.3, 0.31, 0.36]; KL=[0.06, 0.06, 0.06, 0.06, 0.06, 0.06, 0.06]; XF=[1, 1, 1, 1, 1, 1, 1]
                    LL source: Field measured and checked for sensibility
                  SoilCrop CottonSoil: LL=[0.22, 0.22, 0.22, 0.25, 0.27, 0.3, 0.33]; KL=[0.1, 0.1, 0.1, 0.1, 0.09, 0.07, 0.05]; XF=[1, 1, 1, 1, 1, 1, 1]
                    LL source: Field measured and checked for sensibility
                  SoilCrop SorghumSoil: LL=[0.22, 0.22, 0.24, 0.26, 0.28, 0.31, 0.34]; KL=[0.07, 0.07, 0.07, 0.05, 0.05, 0.04, 0.03]; XF=[1, 1, 1, 1, 1, 1, 1]
                    LL source: Field measured and checked for sensibility
                  SoilCrop MungbeanSoil: LL=[0.22, 0.22, 0.28, 0.34, 0.33, 0.37, 0.37]; KL=[0.06, 0.06, 0.06, 0.04, 0.04, 0.01, 0.01]; XF=[1, 1, 1, 1, 1, 1, 1]
                    LL source: Field measured and checked for sensibility
                SoilWater: SummerDate=1-Nov; SummerU=6; SummerCona=3.5; WinterDate=1-Apr; WinterU=4; WinterCona=2.5; DiffusConst=40; DiffusSlope=16; Salb=0.12; CN2Bare=73; CNRed=20; CNCov=0.8; max_pond=0; Thickness=[150, 150, 300, 300, 300, 300, 300]; SWCON=[0.3, 0.3, 0.3, 0.3, 0.3, 0.3, 0.3]; PrecipitationInterception=0
                Nutrient: same as Validation.Australia.Emerald.Emerald_2013.Emerald_2013Base.paddock.Soil.Nutrient
                CERESSoilTemperature
                Organic: FOMCNRatio=40
                  Thickness  Carbon  SoilCNRatio  FBiom  FInert  FOM
                  150        0.88    12           0.04   0.4     347.129
                  150        0.76    12           0.02   0.6     270.344
                  300        0.62    12           0.02   0.8     163.972
                  300        0.32    12           0.02   1       99.4541
                  300        0.12    12           0.01   1       60.322
                  300        0.1     12           0.01   1       36.5871
                  300        0.05    12           0.01   1       22.1912
                Chemical: Thickness=[150, 150, 300, 300, 300, 300, 300]; PH=[8.9, 9.2, 9.3, 9, 8.8, 7.5, 8.4]
                InitialWater: PercentMethod=0; FractionFull=1
                Sample InitialNitrogen: Thickness=[150, 150, 300, 300, 300, 300, 300]; NO3N=[46.85, 46.85, 0, 0, 0, 0, 0]; SWUnits=Volumetric; OCUnits=Total; PHUnits=Water
              MicroClimate: a_interception=0; b_interception=1; c_interception=0; d_interception=0; soil_albedo=0.3; SoilHeatFluxFraction=0; MinimumHeightDiffForNewLayer=0; NightInterceptionFraction=0; ReferenceHeight=0
              Irrigation
              Fertiliser
              Plant Cotton: CropType=Cotton; IsAlive=false; IsEnding=false; DaysAfterEnding=0
              Manager Pre sowing fertiliser
                FertiliserType = NO3N
                FertiliserDates = 22-sep
                Amount = 200
                AmountType = False
                script: same as in Validation.Australia.Emerald.Emerald_2013.Emerald_2013Base.paddock.FertiliseRule
              Manager SowingRule
                RowSpacing = 1000
                SowingDepth = 50
                SowingRate = 11
                CultivarName = Sicot71
                SowingDate = 10/10/2006 00:00:00
                script: same as in Validation.Australia.Emerald.Emerald_2013.Emerald_2013Base.paddock.SowingRule
              Manager IrrigateRule
                FASW = 0
                WaterDeficit = 0
                IrrigateDates = 275
                FASWDepth = 1000
                Depth = 0
                Efficiency = 1
                WillRunoff = False
```csharp
using System;
using Models.Core;
using Models.PMF;
using Models.Soils;
using APSIM.Shared.Utilities;
namespace Models
{
    [Serializable]
    public class Script : Model
    {
        public double FASW { get; set; }
        public double WaterDeficit  { get; set; }
       
        [Link] Clock Clock;
        [Link] Irrigation Irrigation;
        [Link] Soil soil;
        
        [Separator("A component to apply irrigation on one or more (day of year) on every year of the simulation")]

        [Description("Enter the irrigation dates as (Day Of Year) with comma separation")] 
        public string[] IrrigateDates { get; set; }

        [Description("Soil depth (mm) to which fraction available water is calculated")]
        public double FASWDepth { get; set; }
        
        [Description("Depth in the soil to apply the  irrigation (mm)")] 
        public double Depth { get; set; }
        
        [Description("Efficiency of irrigation (0-1)")] 
        public double Efficiency { get; set; }
        
        [Description("Will the irrigation runoff?")] 
        public bool WillRunoff { get; set; }
        
        [EventSubscribe("DoManagement")]
        private void OnDoManagement(object sender, EventArgs e)
        {
            foreach (string doy in IrrigateDates)
            {
                if (int.Parse(doy) == Clock.Today.DayOfYear)
                    Irrigation.Apply(amount: WaterDeficit, depth: Depth, efficiency: Efficiency, willRunoff: WillRunoff);
            }
        }




        // Calculate the fraction of the potential available sw
        // Calculate the deficit amount from DUL
        private void CalculateFASW()
        {
            double[] LL15 = MathUtilities.Multiply(soil.LL15, soil.Thickness);
            double[] DUL = MathUtilities.Multiply(soil.DUL, soil.Thickness);
        
            int nlayr = GetLayerIndex(FASWDepth);
            double cumdep = MathUtilities.Sum(soil.Thickness, 0, nlayr, 0.0);	// tricky function that sums up to before nlayr

            double part_layer = MathUtilities.Divide((FASWDepth - cumdep), soil.Thickness[nlayr], 0.0);

            // note that results may be strange if swdep < ll15
            double avail_sw = (MathUtilities.Sum(soil.Water, 0, nlayr, 0.0) + part_layer * soil.Water[nlayr])
                            - (MathUtilities.Sum(LL15, 0, nlayr, 0.0) + part_layer * LL15[nlayr]);

            double pot_avail_sw = (MathUtilities.Sum(DUL, 0, nlayr, 0.0) + part_layer * DUL[nlayr])
                                - (MathUtilities.Sum(LL15, 0, nlayr, 0.0) + part_layer * LL15[nlayr]);
			
            FASW = MathUtilities.Divide(avail_sw, pot_avail_sw, 0.0);
            WaterDeficit = MathUtilities.Constrain(pot_avail_sw - avail_sw, 0.0, 100000);
        }

        // Get index of the layer that has this depth in it 
        private int GetLayerIndex(double pointDepth)
        {
            double[] cumThickness = soil.ThicknessCumulative;
            int layerIdx = 0;
            while ((layerIdx < cumThickness.Length) && (pointDepth > cumThickness[layerIdx]))
            {
            	layerIdx += 1;
            }

            return layerIdx;
        }

    }
}
```
              Manager HarvestRule: same as Validation.Australia.Emerald.Emerald_2013.Emerald_2013Base.paddock.HarvestRule
              Report DailyReport: same as Validation.Australia.Emerald.Emerald_2013.Emerald_2013Base.paddock.DailyReport
              Report HarvestReport: EventNames=[Cotton].Harvesting
                VariableNames:
                  [Clock].Today
                  [Cotton].Structure.MainStemPrimordiaNo
                  [Cotton].Phenology.NFF
                  [Cotton].Script.FinalTag
        Experiment Narrabri_2007
          Factors
            Permutation
              Factor Sow
                CompositeFactor Blue
                  Specifications:
                    [IrrigateRule].Script.IrrigateDates=278,340,348,365,5,15,29,42,49,56,69
                    [HarvestRule].Script.HarvestDate=2014-01-17
                CompositeFactor Green
                  Specifications:
                    [IrrigateRule].Script.IrrigateDates=278,346,3,17,32,46,69
                    [HarvestRule].Script.HarvestDate=2014-01-17
                CompositeFactor Red
                  Specifications:
                    [IrrigateRule].Script.IrrigateDates=278,348,11,42,56
                    [HarvestRule].Script.HarvestDate=2014-01-17
                CompositeFactor Grey
                  Specifications:
                    [IrrigateRule].Script.IrrigateDates=278,5,49
                    [HarvestRule].Script.HarvestDate=2014-01-17
          Simulation Narrabri_2007Base
            Weather: FileName=Narrabri_2006-07.met
            Clock: Start=2007-06-01; End=2008-06-01
            Summary summaryfile
            SoilArbitrator Soil Arbitrator
            Zone paddock: Area=1; Slope=0; AspectAngle=0; Altitude=50
              SurfaceOrganicMatter: InitialResidueName=cotton; InitialResidueType=cotton; InitialResidueMass=1000; InitialStandingFraction=0; InitialCPR=0; InitialCNR=80; FractionFaecesAdded=1
              Soil: same as Validation.Australia.Narrabri.Narrabri_2006.Narrabri_2006Base.paddock.Soil
              MicroClimate: a_interception=0; b_interception=1; c_interception=0; d_interception=0; soil_albedo=0.3; SoilHeatFluxFraction=0; MinimumHeightDiffForNewLayer=0; NightInterceptionFraction=0; ReferenceHeight=0
              Irrigation
              Fertiliser
              Plant Cotton: CropType=Cotton; IsAlive=false; IsEnding=false; DaysAfterEnding=0
              Manager Pre sowing fertiliser
                FertiliserType = NO3N
                FertiliserDates = 28-sep
                Amount = 200
                AmountType = False
                script: same as in Validation.Australia.Emerald.Emerald_2013.Emerald_2013Base.paddock.FertiliseRule
              Manager SowingRule
                RowSpacing = 1000
                SowingDepth = 50
                SowingRate = 9.5
                CultivarName = Sicot71
                SowingDate = 10/15/2007 00:00:00
                script: same as in Validation.Australia.Emerald.Emerald_2013.Emerald_2013Base.paddock.SowingRule
              Manager IrrigateRule: same as Validation.Australia.Narrabri.Narrabri_2006.Narrabri_2006Base.paddock.IrrigateRule
              Manager HarvestRule: same as Validation.Australia.Emerald.Emerald_2013.Emerald_2013Base.paddock.HarvestRule
              Report DailyReport: same as Validation.Australia.Emerald.Emerald_2013.Emerald_2013Base.paddock.DailyReport
              Report HarvestReport: EventNames=[Cotton].Harvesting
                VariableNames:
                  [Clock].Today
                  [Cotton].Structure.MainStemPrimordiaNo
                  [Cotton].Phenology.NFF
                  [Cotton].Script.FinalTag
        Experiment Narrabri_2008
          Factors
            Permutation
              Factor Sow
                CompositeFactor Blue
                  Specifications:
                    [IrrigateRule].Script.IrrigateDates=275,343,356,2,9,15,23,30,36,42,58,71
                    [HarvestRule].Script.HarvestDate=2014-01-17
                CompositeFactor Green
                  Specifications:
                    [IrrigateRule].Script.IrrigateDates=275,346,358,7,15,25,33,41,62,75
                    [HarvestRule].Script.HarvestDate=2014-01-17
                CompositeFactor Red
                  Specifications:
                    [IrrigateRule].Script.IrrigateDates=275,11,28,39,65
                    [HarvestRule].Script.HarvestDate=2014-01-17
                CompositeFactor Red_Green
                  Specifications:
                    [IrrigateRule].Script.IrrigateDates=275,11,28,39
                    [HarvestRule].Script.HarvestDate=2014-01-17
                CompositeFactor Grey
                  Specifications:
                    [IrrigateRule].Script.IrrigateDates=275,16,37
                    [HarvestRule].Script.HarvestDate=2014-01-17
                CompositeFactor Yellow
                  Specifications:
                    [IrrigateRule].Script.IrrigateDates=275,11,25,33,41,62
                    [HarvestRule].Script.HarvestDate=2014-01-17
          Simulation Narrabri_2008Base
            Weather: FileName=Narrabri_2008.met
            Clock: Start=2008-06-01; End=2009-04-30
            Summary summaryfile
            SoilArbitrator Soil Arbitrator
            Zone paddock: Area=1; Slope=0; AspectAngle=0; Altitude=50
              SurfaceOrganicMatter: InitialResidueName=cotton; InitialResidueType=cotton; InitialResidueMass=1000; InitialStandingFraction=0; InitialCPR=0; InitialCNR=80; FractionFaecesAdded=1
              Soil: ASCOrder=Vertosol; ASCSubOrder=Grey; SoilType=Clay; Site=Myall Vale; NearestTown=Narrabri, NSW 2390; Region=North West Slopes and Plains; State=New South Wales; Country=Australia; NaturalVegetation=Grasslands; ApsoilNumber=97; Latitude=-30.203; Longitude=149.593; LocationAccuracy=+/- 20m; DataSource=CSIRO Plant Industry, Myall Vale (D Richards)
                Physical: same as Validation.Australia.Narrabri.Narrabri_2006.Narrabri_2006Base.paddock.Soil.Physical
                SoilWater: same as Validation.Australia.Narrabri.Narrabri_2006.Narrabri_2006Base.paddock.Soil.SoilWater
                Nutrient: same as Validation.Australia.Emerald.Emerald_2013.Emerald_2013Base.paddock.Soil.Nutrient
                CERESSoilTemperature
                Organic: same as Validation.Australia.Narrabri.Narrabri_2006.Narrabri_2006Base.paddock.Soil.Organic
                Chemical: Thickness=[150, 150, 300, 300, 300, 300, 300]; PH=[8.9, 9.2, 9.3, 9, 8.8, 7.5, 8.4]
                InitialWater: PercentMethod=0; FractionFull=1
                Sample InitialNitrogen: Thickness=[150, 150, 300, 300, 300, 300, 300]; NO3N=[41.9, 41.9, 0, 0, 0, 0, 0]; SWUnits=Volumetric; OCUnits=Total; PHUnits=Water
              MicroClimate: a_interception=0; b_interception=1; c_interception=0; d_interception=0; soil_albedo=0.3; SoilHeatFluxFraction=0; MinimumHeightDiffForNewLayer=0; NightInterceptionFraction=0; ReferenceHeight=0
              Irrigation
              Fertiliser
              Plant Cotton: CropType=Cotton; IsAlive=false; IsEnding=false; DaysAfterEnding=0
              Manager Pre sowing fertiliser
                FertiliserType = NO3N
                FertiliserDates = 12-sep
                Amount = 200
                AmountType = False
                script: same as in Validation.Australia.Emerald.Emerald_2013.Emerald_2013Base.paddock.FertiliseRule
              Manager SowingRule
                RowSpacing = 1000
                SowingDepth = 50
                SowingRate = 8.5
                CultivarName = Sicot71
                SowingDate = 10/15/2008 00:00:00
                script: same as in Validation.Australia.Emerald.Emerald_2013.Emerald_2013Base.paddock.SowingRule
              Manager IrrigateRule: same as Validation.Australia.Narrabri.Narrabri_2006.Narrabri_2006Base.paddock.IrrigateRule
              Manager HarvestRule: same as Validation.Australia.Emerald.Emerald_2013.Emerald_2013Base.paddock.HarvestRule
              Report DailyReport: same as Validation.Australia.Emerald.Emerald_2013.Emerald_2013Base.paddock.DailyReport
              Report HarvestReport: EventNames=[Cotton].Harvesting
                VariableNames:
                  [Clock].Today
                  [Cotton].Structure.MainStemPrimordiaNo
                  [Cotton].Phenology.NFF
                  [Cotton].Script.FinalTag
      Folder NarrabriRose
        Memo
          Treatments
          ----------

          2009/10
          -------
          Trt1 - Control

          Trt2 - Smaller Deficit (High ETo) [Early Sowing]

          Trt3 - Larger Deficit (Low ETo) [Late Sowing]

          Trt4 - Dynamic L.S.D

          2010/11
          -------
          Trt1 - Control

          Trt2 - Smaller Deficit (High ETo)

          Trt3 - Larger Deficit (Low ETo) L.S.D

          Used Ozcot input files because the spreadsheet did not contain enough information

          2009/10
          -------
          Got the average initital nitrogen from the "Agronomic Info A2 2009-10.xlsx" Sheet "Soil N"

          I did not get the initial soil water from the "Soil Moist." sheet because all irrigations fill the profile,
           and Pre-Irrigations on 25/09/2009, 1 day after the initial soil water sample on the 24/09/2009 make the initial water on the 24/09/2009 irrelavant.

          I set the clock start date to this initial sample date

          nb. The ozcot input files have defoilations see below,
          DefoliantSprayDate1=20100417
          DefoliantSprayDate2=20100423
          I can't implement these so they will need to be added later.

          There was a cultivation on 17/12/2009

          Sprays
          ------

          Date	Chemical	Rate	Notes
          5/11/2009	Roundup	1.5 l/ha	Over the top
          17/11/2009	Roundup	20ml/L	Spot Spray
          24/12/2009	Steward	.85 L/ha
          	Salt	1 kg/ha
          30/01/2010	Steward	.85 L/ha
          	Salt	1 kg/ha
          12/02/2010	Altacor	.15 L/ha
          	Sheild	.25 L/ha
          26/02/2010	Admiral	.5 L/ha
          17/04/2010	Dropp	?
          	Prep	.5 L/ha
          23/04/2010	Dropp	?
          	Prep	?
          6/05/2010	Dropp	?
          	Prep	?

          2010/11
          -------
          Used the same method as for 2009/10

          nb. The ozcot input files have defoilations see below,
          DefoliantSprayDate1=20110414
          DefoliantSprayDate2=20110426
          I can't implement these so they will need to be added later.

          There was a cultivation on 17/1/2011

          Sprays
          ------

          Date	Chemical	Rate
          23/09/2010	Roundup	1.5 L/ha
          29/10/2010	Roundup	1.5 L/ha
          15/12/2010	Roundup	1.5 L/ha
          3/01/2011	Steward and Salt	?
          9/02/2011	Regent	50 mL/ha
          	Salt
          25/02/2011	Pirimor	0.75 L/ha
          	Regent	0.04 L/ha
          20/03/2011	Talstar 100EC	0.8 L/ha
          	Agrimec	0.3 L/ha
          14/04/2011	Dropp	0.1 L/ha
          	Prep	0.5 L/ha
          	Oil	2%
          26/04/2011	Dropp	0.15 L/ha
          	Prep	2 L/ha
          	Oil
        Experiment Narrabri_2009
          Factors
            Permutation
              Factor Sow
                CompositeFactor Trt1
                  Specifications:
                    [IrrigateRule].Script.IrrigateDates=268,281,337,356,18,28,62
                    [HarvestRule].Script.HarvestDate=2009-10-21
                CompositeFactor Trt2
                  Specifications:
                    [IrrigateRule].Script.IrrigateDates=268,281,337,356,18,25,62
                    [HarvestRule].Script.HarvestDate=2009-10-21
                CompositeFactor Trt3
                  Specifications:
                    [IrrigateRule].Script.IrrigateDates=268,281,337,356,18,28,68
                    [HarvestRule].Script.HarvestDate=2009-10-21
                CompositeFactor Trt4
                  Specifications:
                    [IrrigateRule].Script.IrrigateDates=268,281,337,356,21,36,68
                    [HarvestRule].Script.HarvestDate=2009-10-21
          Simulation Narrabri_2009Base
            Weather: FileName=MyallVale2009_2011.met
            Clock: Start=2009-09-24; End=2010-06-01
            Summary summaryfile
            SoilArbitrator Soil Arbitrator
            Zone paddock: Area=1; Slope=0; AspectAngle=0; Altitude=50
              SurfaceOrganicMatter: InitialResidueName=cotton; InitialResidueType=cotton; InitialResidueMass=1000; InitialStandingFraction=0; InitialCPR=0; InitialCNR=80; FractionFaecesAdded=1
              Soil: ASCOrder=Vertosol; ASCSubOrder=Grey; SoilType=Clay; Site=Myall Vale; NearestTown=Narrabri, NSW 2390; Region=North West Slopes and Plains; State=New South Wales; Country=Australia; NaturalVegetation=Grasslands; ApsoilNumber=97; Latitude=-30.203; Longitude=149.593; LocationAccuracy=+/- 20m; DataSource=CSIRO Plant Industry, Myall Vale (D Richards)
                Physical: same as Validation.Australia.Narrabri.Narrabri_2006.Narrabri_2006Base.paddock.Soil.Physical
                SoilWater: same as Validation.Australia.Narrabri.Narrabri_2006.Narrabri_2006Base.paddock.Soil.SoilWater
                Nutrient
                  DirectedGraphInfo={Nodes=[{Name=Inert, OutlineColour=Black}, {Name=SurfaceResidue, OutlineColour=Black}, {Name=FOMLignin, OutlineColour=Black}, {Name=FOMCellulose, OutlineColour=Black}, {Name=FOMCarbohydrate, OutlineColour=Black}, {Name=Microbial, OutlineColour=Black}, {Name=Humic, OutlineColour=Black}, {Name=Urea, OutlineColour=Black}, {Name=NO3, OutlineColour=Black}, {Name=NH4, OutlineColour=Black}, {Name=Atmosphere, OutlineColour=255, 255, 255}], Arcs=[{SourceName=SurfaceResidue, DestinationName=Microbial}, {SourceName=SurfaceResidue, DestinationName=Humic}, {SourceName=FOMLignin, DestinationName=Microbial}, {SourceName=FOMLignin, DestinationName=Humic}, {SourceName=FOMCellulose, DestinationName=Microbial}, {SourceName=FOMCellulose, DestinationName=Humic}, {SourceName=FOMCarbohydrate, DestinationName=Microbial}, {SourceName=FOMCarbohydrate, DestinationName=Humic}, {SourceName=Microbial, DestinationName=Microbial}, {SourceName=Microbial, DestinationName=Humic}, {SourceName=Humic, DestinationName=Microbial}, {SourceName=Urea, DestinationName=NH4}, {SourceName=NO3, DestinationName=Atmosphere}, {SourceName=NH4, DestinationName=NO3}]}
                CERESSoilTemperature
                Organic: same as Validation.Australia.Narrabri.Narrabri_2006.Narrabri_2006Base.paddock.Soil.Organic
                Chemical: Thickness=[150, 150, 300, 300, 300, 300, 300]; PH=[8.9, 9.2, 9.3, 9, 8.8, 7.5, 8.4]
                InitialWater: PercentMethod=0; FractionFull=1
                Sample InitialNitrogen: Thickness=[150, 150, 300, 300, 300, 300, 300]; NO3N=[275.1, 42.525, 42.12, 38.5725, 30.672, 0, 0]; SWUnits=Volumetric; OCUnits=Total; PHUnits=Water
              MicroClimate: a_interception=0; b_interception=1; c_interception=0; d_interception=0; soil_albedo=0.3; SoilHeatFluxFraction=0; MinimumHeightDiffForNewLayer=0; NightInterceptionFraction=0; ReferenceHeight=0
              Irrigation
              Fertiliser
              Plant Cotton: CropType=Cotton; IsAlive=false; IsEnding=false; DaysAfterEnding=0
              Manager Pre sowing fertiliser
                FertiliserType = NO3N
                FertiliserDates = 7-aug
                Amount = 183.04
                AmountType = False
                script: same as in Validation.Australia.Emerald.Emerald_2013.Emerald_2013Base.paddock.FertiliseRule
              Manager SowingRule
                RowSpacing = 1000
                SowingDepth = 35
                SowingRate = 14.7
                CultivarName = Sicot71
                SowingDate = 10/21/2009 00:00:00
                script: same as in Validation.Australia.Emerald.Emerald_2013.Emerald_2013Base.paddock.SowingRule
              Manager IrrigateRule: same as Validation.Australia.Narrabri.Narrabri_2006.Narrabri_2006Base.paddock.IrrigateRule
              Manager HarvestRule
                HarvestDate = 05/16/2010 00:00:00
                script: same as in Validation.Australia.Emerald.Emerald_2013.Emerald_2013Base.paddock.HarvestRule
              Report DailyReport: same as Validation.Australia.Emerald.Emerald_2013.Emerald_2013Base.paddock.DailyReport
              Report HarvestReport: EventNames=[Cotton].Harvesting
                VariableNames:
                  [Clock].Today
                  [Cotton].Structure.MainStemPrimordiaNo
                  [Cotton].Phenology.NFF
                  [Cotton].Script.FinalTag
        Experiment Narrabri_2010
          Factors
            Permutation
              Factor Sow
                CompositeFactor Trt1
                  Specifications:
                    [IrrigateRule].Script.IrrigateDates=5,21,31,41,55,68
                    [HarvestRule].Script.HarvestDate=2010-10-14
                CompositeFactor Trt2
                  Specifications:
                    [IrrigateRule].Script.IrrigateDates=5,18,28,39,55,68
                    [HarvestRule].Script.HarvestDate=2010-10-14
                CompositeFactor Trt3
                  Specifications:
                    [IrrigateRule].Script.IrrigateDates=5,21,31,49,60
                    [HarvestRule].Script.HarvestDate=2010-10-14
          Simulation Narrabri_2010Base
            Weather: FileName=MyallVale2009_2011.met
            Clock: Start=2010-11-26; End=2011-06-01
            Summary summaryfile
            SoilArbitrator Soil Arbitrator
            Zone paddock: Area=1; Slope=0; AspectAngle=0; Altitude=50
              SurfaceOrganicMatter: InitialResidueName=cotton; InitialResidueType=cotton; InitialResidueMass=1000; InitialStandingFraction=0; InitialCPR=0; InitialCNR=80; FractionFaecesAdded=1
              Soil: ASCOrder=Vertosol; ASCSubOrder=Grey; SoilType=Clay; Site=Myall Vale; NearestTown=Narrabri, NSW 2390; Region=North West Slopes and Plains; State=New South Wales; Country=Australia; NaturalVegetation=Grasslands; ApsoilNumber=97; Latitude=-30.203; Longitude=149.593; LocationAccuracy=+/- 20m; DataSource=CSIRO Plant Industry, Myall Vale (D Richards)
                Physical: same as Validation.Australia.Narrabri.Narrabri_2006.Narrabri_2006Base.paddock.Soil.Physical
                SoilWater: same as Validation.Australia.Narrabri.Narrabri_2006.Narrabri_2006Base.paddock.Soil.SoilWater
                Nutrient: same as Validation.Australia.Emerald.Emerald_2013.Emerald_2013Base.paddock.Soil.Nutrient
                CERESSoilTemperature
                Organic: same as Validation.Australia.Narrabri.Narrabri_2006.Narrabri_2006Base.paddock.Soil.Organic
                Chemical: Thickness=[150, 150, 300, 300, 300, 300, 300]; PH=[8.9, 9.2, 9.3, 9, 8.8, 7.5, 8.4]
                InitialWater: PercentMethod=0; FractionFull=1
                Sample InitialNitrogen: Thickness=[150, 150, 300, 300, 300, 300, 300]; NO3N=[34.752, 34.752, 132.3, 102.86, 0, 0, 0]; SWUnits=Volumetric; OCUnits=Total; PHUnits=Water
              MicroClimate: a_interception=0; b_interception=1; c_interception=0; d_interception=0; soil_albedo=0.3; SoilHeatFluxFraction=0; MinimumHeightDiffForNewLayer=0; NightInterceptionFraction=0; ReferenceHeight=0
              Irrigation
              Fertiliser
              Plant Cotton: CropType=Cotton; IsAlive=false; IsEnding=false; DaysAfterEnding=0
              Manager Pre sowing fertiliser
                FertiliserType = NO3N
                FertiliserDates = 1-oct
                Amount = 221.41
                AmountType = False
                script: same as in Validation.Australia.Emerald.Emerald_2013.Emerald_2013Base.paddock.FertiliseRule
              Manager SowingRule
                RowSpacing = 1000
                SowingDepth = 35
                SowingRate = 12
                CultivarName = Sicot71
                SowingDate = 10/14/2010 00:00:00
                script: same as in Validation.Australia.Emerald.Emerald_2013.Emerald_2013Base.paddock.SowingRule
              Manager IrrigateRule: same as Validation.Australia.Narrabri.Narrabri_2006.Narrabri_2006Base.paddock.IrrigateRule
              Manager HarvestRule
                HarvestDate = 05/15/2011 00:00:00
                script: same as in Validation.Australia.Emerald.Emerald_2013.Emerald_2013Base.paddock.HarvestRule
              Report DailyReport: same as Validation.Australia.Emerald.Emerald_2013.Emerald_2013Base.paddock.DailyReport
              Report HarvestReport: EventNames=[Cotton].Harvesting
                VariableNames:
                  [Clock].Today
                  [Cotton].Structure.MainStemPrimordiaNo
                  [Cotton].Phenology.NFF
                  [Cotton].Script.FinalTag
    Folder Combined Results
      Memo Combined Results
        Simulation results for the combined datasets from the various countries are shown in the following graphs.  The model is able to adequately capture the influence of growing conditions (soil, climate) and management (population, Nitrogen, irrigation, sowing date).
  Folder Sensibility
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