Simulations: Version=100
  Replacements
    Report DailyReport: EventNames=[Clock].DoReport
      VariableNames:
        [Clock].Today
        [Clock].Today as Date
        [Soil].SoilWater.SW
        sum([Soil].SoilWater.SWmm) as ProfileWater
        sum([Soil].Nutrient.NO3.kgha) as TotalNO3
        [Wheat].AboveGround.N
        [Wheat].AboveGround.Wt
        [Wheat].AboveGroundLive.N
        [Wheat].AboveGroundLive.Wt
        [Wheat].AboveGroundDead.N
        [Wheat].AboveGroundDead.Wt
        [Wheat].Ear.N
        [Wheat].Ear.Nconc
        [Wheat].Ear.Wt
        [Wheat].Grain.N
        [Wheat].Grain.NConc
        [Wheat].Grain.Number
        [Wheat].Grain.Size
        [Wheat].Grain.Wt
        [Wheat].Leaf.AppearedCohortNo
        [Wheat].Leaf.CoverGreen
        [Wheat].Leaf.CoverTotal
        [Wheat].Leaf.Dead.N
        [Wheat].Leaf.Dead.NConc
        [Wheat].Leaf.Dead.Wt
        [Wheat].Leaf.DeadCohortNo
        [Wheat].Leaf.SenescingCohortNo
        [Wheat].Leaf.ExpandedCohortNo
        [Wheat].Leaf.Fn
        [Wheat].Leaf.Fw
        [Wheat].Leaf.Height
        [Wheat].Leaf.InitialisedCohortNo
        [Wheat].Leaf.LAI
        [Wheat].Leaf.Live.N
        [Wheat].Leaf.Live.NConc
        [Wheat].Leaf.Live.Wt
        [Wheat].Leaf.SpecificArea
        [Wheat].Leaf.SpecificNitrogen
        [Wheat].Leaf.Transpiration
        [Wheat].Phenology.CurrentPhaseName
        [Wheat].Phenology.CurrentStageName
        [Wheat].Phenology.Stage
        [Wheat].Phenology.Zadok.Stage
        [Wheat].Root.Depth
        [Wheat].Root.N
        [Wheat].Root.Wt
        [Wheat].Root.Nconc
        [Wheat].Spike.N
        [Wheat].Spike.NConc
        [Wheat].Spike.Wt
        [Wheat].Stem.N
        [Wheat].Stem.NConc
        [Wheat].Stem.Wt
        [Wheat].StemPlusSpike.Wt
        [Wheat].StemPlusSpike.N
        [Wheat].SowingData.Cultivar
        [Wheat].Structure.HaunStage
        [Wheat].Structure.Height
        [Wheat].Structure.LeafTipsAppeared
        [Wheat].Structure.FinalLeafNumber
        [Wheat].Structure.MainStemPopn
        [Wheat].Structure.TotalStemPopn
        [Wheat].Total.N
        [Wheat].Total.Wt
        ([Wheat].Leaf.Transpiration + [Soil].SoilWater.Es + [MicroClimate].PrecipitationInterception) as ET
    Report HarvestReport: EventNames=[Wheat].Harvesting
      VariableNames:
        [Clock].Today
        [Wheat].Phenology.CurrentPhaseName
        [Wheat].Phenology.CurrentStageName
        [Wheat].Phenology.FlagLeafDAS
        [Wheat].Phenology.FloweringDAS
        [Wheat].Phenology.MaturityDAS
        [Wheat].Grain.Wt
        [Wheat].Grain.N
        [Wheat].Grain.Number
        [Wheat].Grain.Size
        [Wheat].Grain.Nconc
        [Wheat].AboveGround.Wt
        [Wheat].AboveGround.N
        [Wheat].Grain.Protein
        [Wheat].Grain.Size
        [Wheat].Structure.FinalLeafNumber
        [Wheat].Structure.MainStemPopn
        [Wheat].SowingData.Cultivar
        [Wheat].SowingDate.DayOfYear
        [Wheat].Leaf.CohortMaxSize
        [Clock].StartDate
    Plant Wheat: CropType=Wheat; IsAlive=false; IsEnding=false; DaysAfterEnding=0
      Memo TitlePage
        # The APSIM Wheat Model

        _Brown, H.E., Huth, N.I. and Holzworth, D.P._

        The APSIM wheat model has been developed using the Plant Modelling Framework (PMF) of [brown_plant_2014]. This new framework provides a library of plant organ and process submodels that can be coupled, at runtime, to construct a model in much the same way that models can be coupled to construct a simulation. This means that dynamic composition of lower level process and organ classes (e.g. photosynthesis, leaf) into larger constructions (e.g. maize, wheat, sorghum) can be achieved by the model developer without additional coding.

        The model consists of:

        * a phenology model to simulate development between developmental phases
        * a structure model to simulate plant morphology
        * a collection of organs to simulate the various plant parts
        * an arbitrator to allocate resources (N, biomass) to the various plant organs
      OrganArbitrator Arbitrator
        BiomassTypeArbitrator DMArbitration
          Folder PotentialPartitioningMethods
            ReallocationMethod
            AllocateFixationMethod
            RetranslocationMethod
            SendPotentialDMAllocationsMethod
          Folder AllocationMethods
            NutrientConstrainedAllocationMethod
            DryMatterAllocationsMethod
          RelativeAllocation ArbitrationMethod
        BiomassTypeArbitrator NArbitration
          Folder PotentialPartitioningMethods
            ReallocationMethod
          Folder ActualPartitioningMethods
            AllocateFixationMethod
            RetranslocationMethod
          Folder AllocationMethods
            NitrogenAllocationsMethod
          RelativeAllocation ArbitrationMethod
          AllocateUptakesMethod
        WaterUptakeMethod
        NitrogenUptakeMethod
      Phenology
        Memo
          Wheat exhibits a range of developmental responses to environment and these are strongly influences by genotype characteristics.
          Temperature effects development increasing development rates and decreasing phase durations as temperatures increase.  Theset affects are captured by thermal time, .  However, wheat also exhibits vernalisation and photoperiod sensitivities in its Vegetative phase and further photoperiod sensitivity in the EarlyReproducivePhase.  Photoperiod responses are seen as a reduction in the length of a phase for a photoperiod sensitive genotype in response to a longer photoperiod.  Vernalisation responses are more complicated as they are driven by temperature but interact with photoperiod.  For vernalisation sensitive varieties (Winter types) exposure to cool temperatures or short photoperiods during the Vegetative phase will reduce the thermal time duration of the vegetative phase.

          We draw on the Kirby Framework to capture these vernalisation and photoperiod responses.  This framework assumes that the timing of anthesis is a result of the timing of flag leaf and an additional thermal time passage from there to anthesis.  It also assumes the timing of flag leaf is a result of the Final Leaf Number which sets a target, and leaf appearance rate, which sets the rate of progress toward this target.  Leaf appearance rate is a function of Thermal time and a genotype specific Phyllochron which changes with Haun stage as described by [Jamieson_LeafAppearance_1995].

          Final Leaf Number (FLN) is modeled as the sum of three numbers:

          FLN = MinLeafNumber + VernalLeaves + PhotoLeaves

          Where MinLeafNumber is the number of leaves that a wheat crop will produce when vernalisation is satisified early in the crops duration (before 2nd true leaf) and it is grown in a long photoperiod..  VernalLeaves are the number of leaves that are added due to vernalisation effects.  For insensitive varieties this will always be zero but this is potentially a larger number for sensitivie varieties and the number progresively decreases as the crop encounters more vernalisation.  PhotoLeaves are the number of leaves that are added to the minimum leaf number as a result of short day exposure.  For insensitive varieties this will be zero but is potential larger for more sensitivie varieties and decreases as day length increases.  More detailed explinations of the components of phenology are provided below.
        AirTemperatureFunction ThermalTime: agregationMethod=0
          XYPairs TemperatureResponse: X=[0, 26, 37]; Y=[0, 26, 0]
          Memo
            Thermal time determines the rate of developmental progress through many of the crops phases and is used by organs to determing potential growth rates.
          ThreeHourSin InterpolationMethod
        MultiplyFunction DailyVernalisation
          Memo
            Vernalisation responses are based on those described by [Brown_Anthesis_2013].   Vernalisation is assumed to be related to the expression of the Vrn1 Gene.  Its experssion is accumulated daily and daily upregulation as a function of development (DeltaHaunStage) and a TempResponseProfile that declines exponentially from a maximum at 1<sup>o</sup>C to zero at 0<sup>o</sup>C and at 18<sup>o</sup>C.
          VariableReference DeltaHaunStage: VariableName=[Phenology].HaunStage.Delta
          AirTemperatureFunction TempResponseProfile: agregationMethod=0
            XYPairs TemperatureResponse
              X=[0, 1, 2, 3, 4, 5, 6, 7, 8, 9, 10, 11, 12, 13, 14, 15, 16, 17, 18, 19, 20, 30, 32]
              Y=[0, 1.205, 1.037, 0.893, 0.768, 0.661, 0.569, 0.49, 0.422, 0.363, 0.312, 0.269, 0.231, 0.199, 0.171, 0.148, 0.127, 0.109, 0.094, 0.081, 0, 0, -0.5]
            ThreeHourSin InterpolationMethod
        PhotoperiodFunction Photoperiod: Twilight=-6; DayLength=0
        PhaseLookup PerceivedPhotoPeriod
          PhaseLookupValue ApexBelowGround: Start=Germination; End=Emergence
            Constant Photoperiod: FixedValue=0; Units=h
          PhaseLookupValue ApexAboveGround: Start=Emergence; End=HarvestRipe
            VariableReference Photoperiod: VariableName=[Phenology].Photoperiod
        MinimumFunction Vrn1
          Memo
            Vrn1 accumulation begins when Vrn4 experssion is down regulated to zero and stops, assuming vernalisation saturation, at a value of 1
          Constant Saturation: FixedValue=1; Units=Relative Experssion
          AccumulateFunction CurrentExpression: StartStageName=Germination; EndStageName=TerminalSpikelet; FractionRemovedOnCut=0; FractionRemovedOnHarvest=0; FractionRemovedOnGraze=0; FractionRemovedOnPrune=0
            LessThanFunction Vernalisation
              VariableReference If_Vrn4: VariableName=[Phenology].Vrn4
              VariableReference IsLessThanLag: VariableName=[Phenology].VernLag
              Constant Return_Zero: FixedValue=0
              VariableReference elseReturn_Vernalisation: VariableName=[Phenology].DailyVernalisation
        MinimumFunction Vrn4
          VariableReference MaxExpression: VariableName=[Phenology].VernLag
          AccumulateFunction CurrentExpression: StartStageName=Germination; EndStageName=TerminalSpikelet; FractionRemovedOnCut=0; FractionRemovedOnHarvest=0; FractionRemovedOnGraze=0; FractionRemovedOnPrune=0
            VariableReference VernalisationConditioning: VariableName=[Phenology].DailyVernalisation
        Constant MinimumLeafNumber: FixedValue=7; Units=Leaves
          Memo
            Number of leaves the plant will produce when fully vernalised early and grown in long photoperiod
        AccumulateFunction HaunStage: StartStageName=Emergence; EndStageName=FlagLeaf; FractionRemovedOnCut=0; FractionRemovedOnHarvest=0; FractionRemovedOnGraze=0; FractionRemovedOnPrune=0
          PhaseLookup Delta
            PhaseLookupValue Growing: Start=Germination; End=HarvestRipe
              DivideFunction Value
                VariableReference ThermalTime: VariableName=[Phenology].ThermalTime
                VariableReference Phyllochron: VariableName=[Structure].Phyllochron
        ExpressionFunction HaunStageTerminalSpikelet: Expression=([Structure].FinalLeafNumber - 2.85)/1.1
          Memo
            The Haun stage at which Terminal Spikelet occurs is determined from final leaf number using the approach described in [Brown_Anthesis_2013].
        HoldFunction FinalLeafNumber: WhenToHold=TerminalSpikelet
          AddFunction FinalNodeNumber
            VariableReference MinLeafNumber: VariableName=[Phenology].MinimumLeafNumber
            MultiplyFunction VernalLeaves
              VariableReference UnVernalisedLeaves: VariableName=[Phenology].VrnSensitivity
              SubtractFunction VernalisationReductionFactor
                Constant One: FixedValue=1
                VariableReference RelativeVrn1Expression: VariableName=[Phenology].Vrn1
            MultiplyFunction PhotoPLeaves
              VariableReference ShortPpLeaves: VariableName=[Phenology].PpSensitivity
              LinearInterpolationFunction PhotoPeriodReductionFactor
                XYPairs: X=[10, 16]; Y=[1, 0]
                VariableReference XValue: VariableName=[Phenology].Photoperiod
        Constant VrnSensitivity: FixedValue=0; Units=Leaves
          Memo
            The difference between Inherent earlyness leaf number and the number of leaves produced when the plant is unvernalised and grown in long photoperiod
        Constant VernLag: FixedValue=1; Units=Unitless
          Memo
            The amount of vernalising temperature required before vernalisation response will be evident.  Value of relative to the amount offl vernalisation temperature required from the end of the lag until vernalisation saturation.  A value of 0 means there is no lag, a value of 1 means the lag is the same (in vernal time) as the vernalisation requirement and a value of 2 means the lag is twice as long as the vernalisation response phase
        Constant PpSensitivity: FixedValue=3; Units=Leaves
          Memo
            The reduction in leaf number going from 8 to 16 h Pp
        Constant HeadEmergencePpSensitivity: FixedValue=0
          Memo
            The phyllochrons duration for the plant to go from flag leaf ligual appearance at 16 h Pp compared to the phyllochron duration for the same phase at 8 h Pp.
        Constant HeadEmergenceLongDayBase: FixedValue=2.5
          Memo
            The phyllochrons duration for the plant to go from flag leaf ligual appearance at 16 h Pp.
        GerminatingPhase Germinating: Start=Sowing; End=Germination
        EmergingPhase Emerging: ShootLag=40; ShootRate=1.5; Start=Germination; End=Emergence; TTForTimeStep=0
          VariableReference ThermalTime: VariableName=[Phenology].ThermalTime
        NodeNumberPhase Vernalising: Start=Emergence; End=VernalSaturation
          VariableReference ThermalTime: VariableName=[Phenology].ThermalTime
          VariableReference CompletionNodeNumber: VariableName=[Phenology].HaunStageTerminalSpikelet
        GenericPhase SpikeletDifferentiation: Start=VernalSaturation; End=TerminalSpikelet
          VariableReference Progression: VariableName=[Phenology].ThermalTime
          Constant Target: FixedValue=0
        LeafAppearancePhase StemElongation: Start=TerminalSpikelet; End=FlagLeaf
          Memo
            The Final leaf number is fixed at Terminal Spikelet and leaves contune to appear at a rate set by thermal time and phyllochron until flag leaf liguale appears and this phase is completed.
          VariableReference ThermalTime: VariableName=[Phenology].ThermalTime
        GenericPhase HeadEmergence: Start=FlagLeaf; End=Heading
          VariableReference Progression: VariableName=[Phenology].ThermalTime
          MultiplyFunction Target
            VariableReference Phyllochron: VariableName=[Structure].Phyllochron.BasePhyllochron
            AddFunction Phyllochrons
              VariableReference LongDayBase: VariableName=[Phenology].HeadEmergenceLongDayBase
              MultiplyFunction IncreaseDueToShortPhotoPeriod
                LinearInterpolationFunction PhotoPeriodResponse
                  XYPairs: X=[11, 16]; Y=[1, 0]
                  VariableReference XValue: VariableName=[Phenology].Photoperiod
                VariableReference PpSensitivity: VariableName=[Phenology].HeadEmergencePpSensitivity
        GenericPhase EarlyFlowering: Start=Heading; End=Flowering
          VariableReference Progression: VariableName=[Phenology].ThermalTime
          Constant Target: FixedValue=0
        GenericPhase GrainDevelopment: Start=Flowering; End=StartGrainFill
          Constant Target: FixedValue=120
          VariableReference Progression: VariableName=[Phenology].ThermalTime
        GenericPhase GrainFilling: Start=StartGrainFill; End=EndGrainFill
          Constant Target: FixedValue=545
          VariableReference Progression: VariableName=[Phenology].ThermalTime
        GenericPhase Maturing: Start=EndGrainFill; End=Maturity
          Constant Target: FixedValue=35
          VariableReference Progression: VariableName=[Phenology].ThermalTime
        GenericPhase Ripening: Start=Maturity; End=HarvestRipe
          Constant Target: FixedValue=300
          VariableReference Progression: VariableName=[Phenology].ThermalTime
        EndPhase ReadyForHarvesting: Start=HarvestRipe; End=Unused
          VariableReference ThermalTime: VariableName=[Phenology].ThermalTime
        ZadokPMFWheat Zadok
        OnEventFunction FlagLeafDAS: SetEvent=FlagLeaf; ReSetEvent=never
          Memo
            A function is used to provide flowering date as days after sowing(DAS).
          Constant PreEventValue: FixedValue=0
          VariableReference PostEventValue: VariableName=[Phenology].DaysAfterSowing
        OnEventFunction FloweringDAS: SetEvent=Flowering; ReSetEvent=never
          Memo
            A function is used to provide flowering date as days after sowing(DAS).
          Constant PreEventValue: FixedValue=0
          VariableReference PostEventValue: VariableName=[Phenology].DaysAfterSowing
        OnEventFunction MaturityDAS: SetEvent=Maturity; ReSetEvent=never
          Memo
            A function is used to provide maturity date as days after sowing(DAS).
          Constant PreEventValue: FixedValue=0
          VariableReference PostEventValue: VariableName=[Phenology].DaysAfterSowing
        OnEventFunction EmergenceDAS: SetEvent=Emergence; ReSetEvent=never
          Memo
            A function is used to provide flowering date as days after sowing(DAS).
          Constant PreEventValue: FixedValue=0
          VariableReference PostEventValue: VariableName=[Phenology].DaysAfterSowing
      Structure: CohortInitialisationStage=Germination; LeafInitialisationStage=Emergence
        VariableReference ThermalTime: VariableName=[Phenology].ThermalTime
        MultiplyFunction Phyllochron
          Memo Rational
            This is the thermal time between the emergence of leaf tips.  The model used here is based on [Jamieson_SIRIUS_1998] where leaf appearace could be described by a base phyllochron determined between leaves 2 and 7 and a phyllochron that was 70% of base phyllochron for leaves < 2 and 130% of base phyllochron for leaves > 7
          LinearInterpolationFunction LeafStageFactor
            XYPairs: X=[0, 2, 3, 7, 8, 11, 12]; Y=[0.75, 0.75, 1, 1, 1.4, 1.4, 1.4]
            VariableReference XValue: VariableName=[Leaf].AppearedCohortNo
          Constant BasePhyllochron: FixedValue=120; Units=oC.d
          LinearInterpolationFunction PhotoPeriodEffect
            XYPairs: X=[8, 12, 14]; Y=[1.6, 1, 1]
            VariableReference XValue: VariableName=[Phenology].Photoperiod
        MultiplyFunction BranchingRate
          Memo
            Potential branching rate is determined by the commonly observed pattern of tillering in wheat, in which each tiller emerges with the third leaf on its parent axis (e.g. first tiller emerges at the same time as the third leaf on the main stem, the first secondary tiller appears with the third leaf on tiller 1).  This is described as a simple function of main stem leaf number.
          PhaseLookup PotentialBranchingRate
            PhaseLookupValue Vegetative: Start=Emergence; End=TerminalSpikelet
              LinearInterpolationFunction PotentialBranchingRate
                XYPairs: X=[1, 2, 3, 4, 5, 6, 7, 8]; Y=[0, 0, 1, 2, 4, 7, 12, 20]
                VariableReference XValue: VariableName=[Structure].LeafTipsAppeared
            PhaseLookupValue Reproductive: Start=TerminalSpikelet; End=HarvestRipe
              Constant Zero: FixedValue=0
          MinimumFunction StressFactors
            LinearInterpolationFunction NitrogenEffect
              Memo
                Inadequate Nitrogen supply is assumed to affect tillering prior to any effect on photosynthesis or leaf size.
              XYPairs: X=[0.5, 2, 3]; Y=[0, 1, 1]
              VariableReference XValue: VariableName=[Arbitrator].FN
            LinearInterpolationFunction CoverEffect
              Memo
                Tillering is said to cease once a threshold fraction of incoming radiation has been achieved.  This captures shading effects on tillering described by [evers2006cessation].
              XYPairs: X=[0, 0.1, 0.25]; Y=[1, 1, 0]
              VariableReference XValue: VariableName=[Leaf].CoverTotal
            LinearInterpolationFunction WaterStressEffect
              XYPairs: X=[0, 1]; Y=[0, 1]
              VariableReference XValue: VariableName=[Root].WaterTensionFactor
        PhaseLookup BranchMortality
          PhaseLookupValue MortalityPhase: Start=FlagLeaf; End=Flowering
            MultiplyFunction Mortality
              LinearInterpolationFunction MortalityPerDegDay
                XYPairs: X=[0, 0.005]; Y=[0.002, 0]
                VariableReference XValue: VariableName=[Structure].MeanTillerGrowthRate
              VariableReference ThermalTime: VariableName=[Phenology].ThermalTime
        HeightFunction HeightModel
          LinearInterpolationFunction PotentialHeight
            XYPairs: X=[3, 4, 5, 6, 7, 8, 9]; Y=[10, 200, 200, 1000, 1000, 1000, 1000]
            VariableReference XValue: VariableName=[Phenology].Stage
          LinearInterpolationFunction WaterStress
            XYPairs: X=[0.3, 1]; Y=[0, 1]
            VariableReference XValue: VariableName=[Leaf].Fw
        MovingAverageFunction MeanTillerGrowthRate: NumberOfDays=5; StageToStartMovingAverage=Emergence
          Memo
            This is calculated to represent the supply of asslimilate to individual tillers over the past 5 days to use as an index to determine tiller mortality.  When tiller numbers are high or total crop assimilate supply is small there will not be enough assimilate to maintain all of the tillers so the model will senesce some.
          DivideFunction TillerGrowthRate
            VariableReference DailyGrowth: VariableName=[Arbitrator].DM.TotalFixationSupply
            VariableReference ThermalTime: VariableName=[Phenology].ThermalTime
            VariableReference StemPopulation: VariableName=[Structure].TotalStemPopn
        MovingAverageFunction MeanPhyllochron: NumberOfDays=300; StageToStartMovingAverage=Emergence
          VariableReference Phyllochron: VariableName=[Structure].Phyllochron
        AddFunction HaunStage
          VariableReference AppearedLeaves: VariableName=[Leaf].ExpandedCohortNo
          VariableReference ProportionOfExpandingLeaf: VariableName=[Leaf].NextExpandingLeafProportion
        Constant StemSenescenceAge: FixedValue=0
        DivideFunction PTQ
          MultiplyFunction Radn_mol_per_m2
            VariableReference SolarRadiation: VariableName=[IWeather].Radn
            Constant: FixedValue=2.285
            Memo
              Multiply Radn (MJ/m2/d) by 4.57 to convert to mol/m2/day and divide by 2 to convert to mol PAR/m2/d
          VariableReference ThermalTime: VariableName=[Phenology].ThermalTime
        Constant MaxLAR: FixedValue=0.021
        VariableReference FinalLeafNumber: VariableName=[Phenology].FinalLeafNumber
      ReproductiveOrgan Grain: GrowthRespiration=0; MaintenanceRespiration=0; RipeStage=Ripe
        Biomass Live: DMDOfStructural=0.6
        Biomass Dead: DMDOfStructural=0.6
        HoldFunction NumberFunction: WhenToHold=Flowering
          MultiplyFunction GrainNumber
            Constant GrainsPerGramOfStem: FixedValue=26; Units=grains
            VariableReference StemMass: VariableName=[StemPlusSpike].Wt
        Constant DMConversionEfficiency: FixedValue=1
        Constant RemobilisationCost: FixedValue=0
        Constant InitialGrainProportion: FixedValue=0.05
        Constant MaximumPotentialGrainSize: FixedValue=0.05; Units=g
        PhaseLookup DMDemandFunction
          PhaseLookupValue InitialPhase: Start=Flowering; End=StartGrainFill
            FillingRateFunction
              VariableReference NumberFunction: VariableName=[Grain].NumberFunction
              VariableReference FillingDuration: VariableName=[Phenology].GrainDevelopment.Target
              VariableReference ThermalTime: VariableName=[Phenology].ThermalTime
              MultiplyFunction PotentialSizeIncrement
                VariableReference InitialProportion: VariableName=[Grain].InitialGrainProportion
                VariableReference MaximumSize: VariableName=[Grain].MaximumPotentialGrainSize
          PhaseLookupValue LinearPhase: Start=StartGrainFill; End=EndGrainFill
            FillingRateFunction
              VariableReference NumberFunction: VariableName=[Grain].NumberFunction
              VariableReference FillingDuration: VariableName=[Phenology].GrainFilling.Target
              VariableReference ThermalTime: VariableName=[Phenology].ThermalTime
              MultiplyFunction PotentialSizeIncrement
                SubtractFunction ProportionLinearPhase
                  Constant One: FixedValue=1
                  VariableReference InitialProportion: VariableName=[Grain].InitialGrainProportion
                VariableReference MaximumSize: VariableName=[Grain].MaximumPotentialGrainSize
        Constant MinimumNConc: FixedValue=0.0123
        Constant MaxNConcDailyGrowth: FixedValue=0.03
        Constant MaximumNConc: FixedValue=0.03
        PhaseLookup NFillingRate
          PhaseLookupValue GrainFilling: Start=Flowering; End=EndGrainFill
            FillingRateFunction
              VariableReference NumberFunction: VariableName=[Grain].NumberFunction
              AddFunction FillingDuration
                VariableReference FloweringToGrainFilling: VariableName=[Phenology].GrainDevelopment.Target
                VariableReference GrainFilling: VariableName=[Phenology].GrainFilling.Target
              VariableReference ThermalTime: VariableName=[Phenology].ThermalTime
              MultiplyFunction PotentialSizeIncrement
                VariableReference MaximumSize: VariableName=[Grain].MaximumPotentialGrainSize
                VariableReference MaximumNConc: VariableName=[Grain].MaximumNConc
        Constant WaterContent: FixedValue=0.12
        AccumulateFunction AccumThermalTime: StartStageName=Flowering; EndStageName=Maturity; FractionRemovedOnCut=0; FractionRemovedOnHarvest=0; FractionRemovedOnGraze=0; FractionRemovedOnPrune=0
          VariableReference DailyThermalTimeValue: VariableName=[Phenology].ThermalTime
        ExpressionFunction Protein
          Expression=([Grain].Live.N + [Grain].Dead.N)/([Grain].Live.Wt + [Grain].Dead.Wt) * 100 * 5.71
        BiomassRemoval BiomassRemovalDefaults
          OrganBiomassRemovalType Harvest: FractionLiveToRemove=1; FractionDeadToRemove=0; FractionLiveToResidue=0; FractionDeadToResidue=0
          OrganBiomassRemovalType Cut: FractionLiveToRemove=1; FractionDeadToRemove=0; FractionLiveToResidue=0; FractionDeadToResidue=0
          OrganBiomassRemovalType Prune: FractionLiveToRemove=0; FractionDeadToRemove=0; FractionLiveToResidue=0.8; FractionDeadToResidue=0
          OrganBiomassRemovalType Graze: FractionLiveToRemove=0.6; FractionDeadToRemove=0; FractionLiveToResidue=0.2; FractionDeadToResidue=0
          OrganBiomassRemovalType Thin: FractionLiveToRemove=0; FractionDeadToRemove=0; FractionLiveToResidue=0.05; FractionDeadToResidue=0
        Constant CarbonConcentration: FixedValue=0.4
      Root: GrowthRespiration=0; MaintenanceRespiration=0
        RootShapeCylindre RootShape
        Constant DMConversionEfficiency: FixedValue=1
        Constant RemobilisationCost: FixedValue=0
        Constant KLModifier: FixedValue=1
        Constant SoilWaterEffect: FixedValue=1
        Constant MaxDailyNUptake: FixedValue=20
        Constant SenescenceRate: FixedValue=0.005
        Constant MaximumRootDepth: FixedValue=1000000
        Constant MaximumNConc: FixedValue=0.01
        Constant MinimumNConc: FixedValue=0.01
        PhaseBasedSwitch NitrogenDemandSwitch: Start=Germination; End=Maturity
        BiomassRemoval BiomassRemovalDefaults
          OrganBiomassRemovalType Harvest: FractionLiveToRemove=0; FractionDeadToRemove=0; FractionLiveToResidue=0.2; FractionDeadToResidue=0
          OrganBiomassRemovalType Cut: FractionLiveToRemove=0; FractionDeadToRemove=0; FractionLiveToResidue=0.3; FractionDeadToResidue=0
          OrganBiomassRemovalType Prune: FractionLiveToRemove=0; FractionDeadToRemove=0; FractionLiveToResidue=0.1; FractionDeadToResidue=0
          OrganBiomassRemovalType Graze: FractionLiveToRemove=0; FractionDeadToRemove=0; FractionLiveToResidue=0.15; FractionDeadToResidue=0
          OrganBiomassRemovalType Thin: FractionLiveToRemove=0; FractionDeadToRemove=0; FractionLiveToResidue=0.05; FractionDeadToResidue=0
        Constant KNO3: FixedValue=0.02
        Constant KNH4: FixedValue=0.01
        Constant SpecificRootLength: FixedValue=105; Units=m/g
        MultiplyFunction RootFrontVelocity
          PhaseLookup PotentialRootFrontVelocity
            PhaseLookupValue PreEmergence: Start=Germination; End=Emergence
              Constant Value: FixedValue=5; Units=mm/d
            PhaseLookupValue PostEmergence: Start=Emergence; End=Maturity
              Constant Value: FixedValue=20; Units=mm/d
          WeightedTemperatureFunction TemperatureFactor: MaximumTemperatureWeighting=0.5
            XYPairs: X=[0, 15, 25, 35]; Y=[0, 1, 1, 0]
          LinearInterpolationFunction WaterFactor
            SoilWaterScale
            XYPairs: X=[0, 0.25, 1]; Y=[0, 1, 1]
            VariableReference XValue: VariableName=[SoilWaterScale]
        LinearInterpolationFunction NUptakeSWFactor
          SoilWaterScale
          XYPairs: X=[0, 1]; Y=[0, 1]
          Memo
            This is modelled in the same way as the old wheat model where potential N uptake is decreased as the soil dries as described by NUptakeSWFactor
          VariableReference XValue: VariableName=[SoilWaterScale]
        Constant CarbonConcentration: FixedValue=0.4
        Constant MaintenanceRespirationFunction: FixedValue=0
        BiomassDemand DMDemands
          MultiplyFunction Structural
            PartitionFractionDemandFunction DMDemandFunction
              PhaseLookup PartitionFraction
                PhaseLookupValue PreEmergence: Start=Germination; End=Emergence
                  Constant Value: FixedValue=0
                PhaseLookupValue PreFlowering: Start=Emergence; End=Flowering
                  LinearInterpolationFunction AgeFactor
                    XYPairs: X=[3, 4, 5]; Y=[0.5, 0.2, 0.2]
                    VariableReference XValue: VariableName=[Phenology].Stage
                PhaseLookupValue PostFlowering: Start=Flowering; End=EndGrainFill
                  Constant Value: FixedValue=0.2
            Constant StructuralFraction: FixedValue=1
          Constant Metabolic: FixedValue=0
          StorageDMDemandFunction Storage
            SubtractFunction StorageFraction
              Constant One: FixedValue=1
              VariableReference StructuralFraction: VariableName=[Root].DMDemands.Structural.StructuralFraction
        BiomassDemand NDemands
          MultiplyFunction Structural
            VariableReference MinNconc: VariableName=[Root].minimumNconc
            VariableReference PotentialDMAllocation: VariableName=[Root].potentialDMAllocation.Structural
          MultiplyFunction Metabolic
            SubtractFunction MetabolicNconc
              VariableReference CritNconc: VariableName=[Root].criticalNConc
              VariableReference MinNconc: VariableName=[Root].minimumNconc
            VariableReference PotentialDMAllocation: VariableName=[Root].potentialDMAllocation.Structural
          StorageNDemandFunction Storage
            VariableReference NitrogenDemandSwitch: VariableName=[Root].nitrogenDemandSwitch
            VariableReference MaxNconc: VariableName=[Root].maximumNconc
        VariableReference CriticalNConc: VariableName=[Root].MinimumNConc
        BiomassDemand InitialWt
          Constant Structural: FixedValue=0.005; Units=g/plant
          Constant Metabolic: FixedValue=0
          Constant Storage: FixedValue=0
      Leaf: MaxCover=1; Albedo=0.25; Gsmax350=0.011; R50=150; KDead=0.1; MaximumMainStemLeafNumber=30
        zero: CurrentExpandingLeaf, StartFractionExpanded, FractionNextleafExpanded, DeadNodesYesterday, GrowthRespiration, LAI, FRGR, PotentialEP, WaterDemand, TipsAtEmergence, CohortsAtInitialisation, FractionDied
        ExpressionFunction CO2internal: Expression=(163 - [IWeather].MeanT)/(5 - 0.1*[IWeather].MeanT)
        DivideFunction StomatalConductanceCO2Modifier
          VariableReference FCO2: VariableName=[Leaf].Photosynthesis.FCO2
          ExpressionFunction RelativeCO2Gradient
            Expression=([IWeather].CO2 - [Leaf].CO2internal)/(350 - [Leaf].CO2internal)
        LeafCohort InitialLeaves[1]: Rank=1; Area=200
          zero: NReallocationFactor, DMReallocationFactor, NRetranslocationFactor, DMRetranslocationFactor, ShadeInducedSenRate, SenescedFrac, DeltaPotentialArea, DeltaStressConstrainedArea, DeltaCarbonConstrainedArea, PotentialStructuralDMAllocation, PotentialMetabolicDMAllocation, MetabolicNReallocated, MetabolicWtReallocated, StorageNReallocated, StorageWtReallocated, MetabolicNRetranslocated, StorageNRetrasnlocated, DMRetranslocated, MetabolicNAllocation, StructuralDMAllocation, MetabolicDMAllocation, MaintenanceRespiration
        LeafCohort InitialLeaves[2]: Rank=2
          zero: NReallocationFactor, DMReallocationFactor, NRetranslocationFactor, DMRetranslocationFactor, ShadeInducedSenRate, SenescedFrac, DeltaPotentialArea, DeltaStressConstrainedArea, DeltaCarbonConstrainedArea, PotentialStructuralDMAllocation, PotentialMetabolicDMAllocation, MetabolicNReallocated, MetabolicWtReallocated, StorageNReallocated, StorageWtReallocated, MetabolicNRetranslocated, StorageNRetrasnlocated, DMRetranslocated, MetabolicNAllocation, StructuralDMAllocation, MetabolicDMAllocation, Area, MaintenanceRespiration
        LeafCohortParameters CohortParameters: ExpansionStressValue=0
          Constant NReallocationFactor: FixedValue=1
          Constant RemobilisationCost: FixedValue=0
          Constant MaintenanceRespirationFunction: FixedValue=0
          Constant NRetranslocationFactor: FixedValue=0.03
          Constant DMReallocationFactor: FixedValue=1
          Constant DMRetranslocationFactor: FixedValue=1
          MinimumFunction CellDivisionStress
            LinearInterpolationFunction WaterStressEffect
              XYPairs: X=[0.5, 1]; Y=[0.1, 1]
              VariableReference XValue: VariableName=[Leaf].Fw
            LinearInterpolationFunction NitrogenStressEffect
              XYPairs: X=[0, 0.5, 1]; Y=[0.1, 0.1, 1]
              VariableReference XValue: VariableName=[Wheat].Leaf.Fn
          MinimumFunction ExpansionStress
            LinearInterpolationFunction WaterStressEffect
              XYPairs: X=[0.1, 1.1, 1.3]; Y=[0, 1, 1]
              VariableReference XValue: VariableName=[Root].WaterTensionFactor
            LinearInterpolationFunction TemperatureEffect
              XYPairs: X=[0, 12, 14]; Y=[0, 1, 1]
              VariableReference XValue: VariableName=[IWeather].MeanT
            LinearInterpolationFunction NitrogenStressEffect
              XYPairs: X=[0, 0.5, 1]; Y=[0.1, 0.1, 1]
              VariableReference XValue: VariableName=[Wheat].Leaf.Fn
          MultiplyFunction MaxArea
            Constant AreaLargestLeaves: FixedValue=2600; Units=mm^2
            LinearInterpolationFunction AgeFactor
              XYPairs: X=[3, 3.45, 4, 5]; Y=[0.1, 0.5, 1, 1]
              VariableReference XValue: VariableName=[Phenology].Stage
          MultiplyFunction GrowthDuration
            Constant Multiplier: FixedValue=1.3
            VariableReference Phyllochron: VariableName=[Structure].Phyllochron
          MultiplyFunction LagDuration
            LinearInterpolationFunction AgeFactor
              XYPairs: X=[3, 4, 5]; Y=[0.4, 1, 1]
              VariableReference XValue: VariableName=[Phenology].Stage
            SubtractFunction LastLeafDuration
              AddFunction ThermalTimeToRipe
                VariableReference HeadEmergence: VariableName=[Phenology].HeadEmergence.Target
                VariableReference EarlyFlowering: VariableName=[Phenology].EarlyFlowering.Target
                VariableReference GrainDevelopment: VariableName=[Phenology].GrainDevelopment.Target
                VariableReference GrainFilling: VariableName=[Phenology].GrainFilling.Target
                VariableReference Maturing: VariableName=[Phenology].Maturing.Target
                VariableReference Ripening: VariableName=[Phenology].Ripening.Target
              VariableReference SenescenceDuration: VariableName=[Leaf].CohortParameters.SenescenceDuration
          MultiplyFunction SenescenceDuration
            Constant Multiplier: FixedValue=3
            VariableReference Phyllochron: VariableName=[Structure].Phyllochron
          Constant DetachmentLagDuration: FixedValue=1000000
          Constant DetachmentDuration: FixedValue=1000000
          Constant RelativeBranchLeafSize: FixedValue=1
          LinearInterpolationFunction MaximumNConc
            XYPairs: X=[3, 4, 5, 6, 7, 8]; Y=[0.05, 0.05, 0.05, 0.035, 0.02, 0.02]
            VariableReference XValue: VariableName=[Phenology].Stage
          MultiplyFunction CriticalNConc
            LinearInterpolationFunction CriticalNConcAt350ppm
              XYPairs: X=[3, 4, 5, 6, 7, 8]; Y=[0.04, 0.04, 0.04, 0.0275, 0.015, 0.015]
              VariableReference XValue: VariableName=[Phenology].Stage
            LinearInterpolationFunction CO2Factor
              XYPairs: X=[350, 700]; Y=[1, 0.93]
              VariableReference XValue: VariableName=[IWeather].CO2
          LinearInterpolationFunction MinimumNConc
            XYPairs: X=[3, 4, 5, 6, 7, 8]; Y=[0.01, 0.01, 0.01, 0.01, 0.01, 0.01]
            VariableReference XValue: VariableName=[Phenology].Stage
          AddFunction DroughtInducedLagAcceleration
            Constant One: FixedValue=1
            MultiplyFunction Stress
              Constant StressResponseCoefficient: FixedValue=1
              LinearInterpolationFunction StressFactor
                XYPairs: X=[0, 1]; Y=[2, 0]
                VariableReference XValue: VariableName=[Leaf].Fw
          AddFunction DroughtInducedSenAcceleration: same as Replacements.Wheat.Leaf.CohortParameters.DroughtInducedLagAcceleration
          LinearInterpolationFunction SpecificLeafAreaMax
            XYPairs: X=[3, 4, 5, 6, 7, 8]; Y=[17000, 20000, 20000, 18500, 17000, 17000]
            VariableReference XValue: VariableName=[Phenology].Stage
          LinearInterpolationFunction SpecificLeafAreaMin
            XYPairs: X=[0.4, 1]; Y=[14000, 14000]
            VariableReference XValue: VariableName=[Leaf].Fn
          Constant InitialNConc: FixedValue=0
          Constant StructuralFraction: FixedValue=0.5
          Constant StorageFraction: FixedValue=0.3
          Constant LeafSizeShapeParameter: FixedValue=0.3
          Constant SenessingLeafRelativeSize: FixedValue=1; Units=0-1
          Constant ShadeInducedSenescenceRate: FixedValue=0
          ArrayFunction LagDurationAgeMultiplier: Values=1 1 1
          ArrayFunction SenescenceDurationAgeMultiplier: Values=1 1 1
          ArrayFunction LeafSizeAgeMultiplier: Values=1 1 1 1 1 1 1 1 1 1 1 1
        RUEModel Photosynthesis
          Constant RUE: FixedValue=1.5
          WeightedTemperatureFunction FT: MaximumTemperatureWeighting=0.75
            XYPairs: X=[0, 15, 25, 35]; Y=[0, 1, 1, 0]
          LinearInterpolationFunction FN
            XYPairs: X=[0, 1, 1.5]; Y=[0, 1, 1]
            VariableReference XValue: VariableName=[Leaf].Fn
          LinearInterpolationFunction FW
            XYPairs: X=[0, 1, 1]; Y=[0, 1, 1]
            VariableReference XValue: VariableName=[Leaf].Fw
          LinearInterpolationFunction FVPD
            DailyMeanVPD DailyVPD: MaximumVPDWeight=0.66
            XYPairs: X=[0, 10, 40]; Y=[1, 1, 0]
            VariableReference XValue: VariableName=[DailyVPD]
          RUECO2Function FCO2: PhotosyntheticPathway=C3
          VariableReference RadnInt: VariableName=[Leaf].RadIntTot
        Constant FrostFraction: FixedValue=0
        Constant RemobilisationCost: FixedValue=0
        VariableReference ThermalTime: VariableName=[Phenology].ThermalTime
        MinimumFunction FRGRFunction
          WeightedTemperatureFunction FT: MaximumTemperatureWeighting=0.75
            XYPairs: X=[0, 15, 25, 35]; Y=[0, 1, 1, 0]
          LinearInterpolationFunction FN
            XYPairs: X=[0, 1, 1.5]; Y=[0, 1, 1]
            VariableReference XValue: VariableName=[Leaf].Fn
          LinearInterpolationFunction FVPD
            DailyMeanVPD DailyVPD: MaximumVPDWeight=0.66
            XYPairs: X=[0, 10, 40]; Y=[1, 1, 0]
            VariableReference XValue: VariableName=[DailyVPD]
        BiomassRemoval BiomassRemovalDefaults
          OrganBiomassRemovalType Harvest: FractionLiveToRemove=0; FractionDeadToRemove=0; FractionLiveToResidue=0.3; FractionDeadToResidue=0.3
          OrganBiomassRemovalType Cut: FractionLiveToRemove=0.8; FractionDeadToRemove=0.8; FractionLiveToResidue=0; FractionDeadToResidue=0
          OrganBiomassRemovalType Prune: FractionLiveToRemove=0; FractionDeadToRemove=0; FractionLiveToResidue=0.6; FractionDeadToResidue=0.6
          OrganBiomassRemovalType Graze: FractionLiveToRemove=0.6; FractionDeadToRemove=0.6; FractionLiveToResidue=0.1; FractionDeadToResidue=0.1
          OrganBiomassRemovalType Thin: FractionLiveToRemove=0; FractionDeadToRemove=0; FractionLiveToResidue=0.05; FractionDeadToResidue=0.05
        MultiplyFunction ExtinctionCoeff
          Constant VegetativePhase: FixedValue=0.5
          LinearInterpolationFunction DevelopmentFactor
            XYPairs: X=[3, 4, 5, 5.7, 6]; Y=[1, 1, 1, 1, 1.2]
            Memo
              Exntiction coefficient increases at stem extension as leaves become more prostrate
            VariableReference XValue: VariableName=[Phenology].Stage
        Constant StructuralFraction: FixedValue=0.5
        Constant DMConversionEfficiency: FixedValue=1
        Constant CarbonConcentration: FixedValue=0.4
      GenericOrgan Spike: IsAboveGround=true
        Constant NReallocationFactor: FixedValue=0
        Constant RemobilisationCost: FixedValue=0
        PhaseLookup NRetranslocationFactor
          PhaseLookupValue EarlyGrowth: Start=Emergence; End=StartGrainFill
            Constant ValueDuringEarlyGrowth: FixedValue=0
          PhaseLookupValue ReproductiveGrowth: Start=StartGrainFill; End=EndGrainFill
            Constant ValueDuringGrainFill: FixedValue=0.5
        LinearInterpolationFunction MaximumNConc
          XYPairs: X=[3, 4, 5, 5.5, 6.5, 7, 8]; Y=[0.01, 0.01, 0.01, 0.01, 0.025, 0.025, 0.025]
          VariableReference XValue: VariableName=[Phenology].Stage
        Constant MinimumNConc: FixedValue=0.004
        BiomassRemoval BiomassRemovalDefaults
          OrganBiomassRemovalType Harvest: FractionLiveToRemove=0.5; FractionDeadToRemove=0; FractionLiveToResidue=0.1; FractionDeadToResidue=0
          OrganBiomassRemovalType Cut: FractionLiveToRemove=0.8; FractionDeadToRemove=0; FractionLiveToResidue=0; FractionDeadToResidue=0
          OrganBiomassRemovalType Prune: FractionLiveToRemove=0; FractionDeadToRemove=0; FractionLiveToResidue=0.6; FractionDeadToResidue=0
          OrganBiomassRemovalType Graze: FractionLiveToRemove=0.6; FractionDeadToRemove=0; FractionLiveToResidue=0.2; FractionDeadToResidue=0
          OrganBiomassRemovalType Thin: FractionLiveToRemove=0; FractionDeadToRemove=0; FractionLiveToResidue=0.05; FractionDeadToResidue=0
        PhaseBasedSwitch NitrogenDemandSwitch: Start=Emergence; End=StartGrainFill
        PhaseLookup DMRetranslocationFactor
          PhaseLookupValue VegetativeGrowth: Start=Emergence; End=StartGrainFill
            Constant DMRetranslocationFactor: FixedValue=0
          PhaseLookupValue ReproductiveGrowth: Start=StartGrainFill; End=EndGrainFill
            Constant DMRetranslocationFactor: FixedValue=0.5
        Constant DetachmentRateFunction: FixedValue=0; Units=/d
        Constant MaintenanceRespirationFunction: FixedValue=0; Units=0-1
        Constant DMConversionEfficiency: FixedValue=1; Units=0-1
        VariableReference HeadNumber: VariableName=[Structure].TotalStemPopn
        Constant DMReallocationFactor: FixedValue=0
        AddFunction CriticalNConc
          VariableReference MinimumNConc: VariableName=[Spike].MinimumNConc
          MultiplyFunction MetabolicNconc
            SubtractFunction NonStructuralN
              VariableReference MaximumNConc: VariableName=[Spike].MaximumNConc
              VariableReference MinimumNConc: VariableName=[Spike].MinimumNConc
            Constant Proportion: FixedValue=0.8
        LinearInterpolationFunction SenescenceRate
          XYPairs: X=[3, 4, 5, 6, 7, 8]; Y=[0.07, 0.04, 0.04, 0.015, 0.012, 0.012]
          VariableReference XValue: VariableName=[Phenology].Stage
        Constant CarbonConcentration: FixedValue=0.4
        BiomassDemand DMDemands
          MultiplyFunction Structural
            PartitionFractionDemandFunction DMDemandFunction
              LinearInterpolationFunction PartitionFraction
                XYPairs: X=[3, 4, 5, 5.7, 6, 7, 8, 9, 9.000001]; Y=[0, 0, 0, 0.01, 0.7, 0.7, 0.7, 0.7, 0]
                VariableReference XValue: VariableName=[Phenology].Stage
            PhaseLookup StructuralFraction
              PhaseLookupValue VegetativeGrowth: Start=Emergence; End=StartGrainFill
                Constant StructuralFractionEG: FixedValue=0.3
              PhaseLookupValue ReproductiveGrowth: Start=StartGrainFill; End=EndGrainFill
                Constant StructuralFractionGF: FixedValue=0
          Constant Metabolic: FixedValue=0
          StorageDMDemandFunction Storage
            SubtractFunction StorageFraction
              Constant One: FixedValue=1
              VariableReference StructuralFraction: VariableName=[Spike].DMDemands.Structural.StructuralFraction
        BiomassDemand NDemands
          MultiplyFunction Structural
            VariableReference MinNconc: VariableName=[Spike].minimumNconc
            VariableReference PotentialDMAllocation: VariableName=[Spike].potentialDMAllocation.Structural
          MultiplyFunction Metabolic
            SubtractFunction MetabolicNconc
              VariableReference CritNconc: VariableName=[Spike].criticalNConc
              VariableReference MinNconc: VariableName=[Spike].minimumNconc
            VariableReference PotentialDMAllocation: VariableName=[Spike].potentialDMAllocation.Structural
          StorageNDemandFunction Storage
            VariableReference NitrogenDemandSwitch: VariableName=[Spike].nitrogenDemandSwitch
            VariableReference MaxNconc: VariableName=[Spike].maximumNconc
        RetranslocateNonStructural RetranslocateNitrogen
        BiomassDemand InitialWt
          Constant Structural: FixedValue=0; Units=g/m^2
          Constant Metabolic: FixedValue=0
          Constant Storage: FixedValue=0
      GenericOrgan Stem: IsAboveGround=true
        LinearInterpolationFunction SenescenceRate
          XYPairs: X=[3, 4, 5, 6, 7, 8, 9, 10, 11]; Y=[0, 0, 0, 0, 0, 0, 0, 0.2, 0.5]
          VariableReference XValue: VariableName=[Phenology].Stage
        Constant RemobilisationCost: FixedValue=0
        LinearInterpolationFunction MaximumNConc
          XYPairs: X=[3, 4, 5, 6, 7, 8]; Y=[0.07, 0.04, 0.04, 0.015, 0.012, 0.012]
          VariableReference XValue: VariableName=[Phenology].Stage
        Constant MinimumNConc: FixedValue=0.0025
        PhaseBasedSwitch NitrogenDemandSwitch: Start=Emergence; End=StartGrainFill
        Constant NReallocationFactor: FixedValue=0
        PhaseLookup NRetranslocationFactor
          PhaseLookupValue VegetativeGrowth: Start=Sowing; End=Flowering
            Constant Fraction: FixedValue=0
          PhaseLookupValue ReproductiveGrowth: Start=Flowering; End=HarvestRipe
            Constant Fraction: FixedValue=0.5
        PhaseLookup DMRetranslocationFactor: same as Replacements.Wheat.Spike.DMRetranslocationFactor
        BiomassRemoval BiomassRemovalDefaults: same as Replacements.Wheat.Spike.BiomassRemovalDefaults
        DivideFunction PercentWSC
          VariableReference WSC: VariableName=[Stem].Live.StorageWt
          VariableReference StemWt: VariableName=[Stem].Live.Wt
        Constant DetachmentRateFunction: FixedValue=0; Units=/d
        Constant MaintenanceRespirationFunction: FixedValue=0; Units=0-1
        Constant DMConversionEfficiency: FixedValue=1; Units=0-1
        Constant DMReallocationFactor: FixedValue=0
        AddFunction CriticalNConc
          VariableReference MinimumNConc: VariableName=[Stem].MinimumNConc
          MultiplyFunction MetabolicNconc
            SubtractFunction NonStructuralN
              VariableReference MaximumNConc: VariableName=[Stem].MaximumNConc
              VariableReference MinimumNConc: VariableName=[Stem].MinimumNConc
            Constant Proportion: FixedValue=0.5
        Constant CarbonConcentration: FixedValue=0.4
        BiomassDemand DMDemands
          MultiplyFunction Structural
            PartitionFractionDemandFunction DMDemandFunction
              PhaseLookup PartitionFraction
                PhaseLookupValue PreStemElongation: Start=Emergence; End=TerminalSpikelet
                  Constant StemFraction: FixedValue=0.2
                PhaseLookupValue StemElongation: Start=TerminalSpikelet; End=StartGrainFill
                  Constant StemFraction: FixedValue=0.7; Units=0
                PhaseLookupValue EarEmergence: Start=StartGrainFill; End=HarvestRipe
                  Constant StemFraction: FixedValue=0
            PhaseLookup StructuralFraction
              PhaseLookupValue VegetativeGrowth: Start=Sowing; End=StartGrainFill
                Constant Fraction: FixedValue=0.3
              PhaseLookupValue ReproductiveGrowth: Start=StartGrainFill; End=HarvestRipe
                Constant Fraction: FixedValue=0.01
          Constant Metabolic: FixedValue=0
          StorageDMDemandFunction Storage
            SubtractFunction StorageFraction
              Constant One: FixedValue=1
              VariableReference StructuralFraction: VariableName=[Stem].DMDemands.Structural.StructuralFraction
        BiomassDemand NDemands
          MultiplyFunction Structural
            VariableReference MinNconc: VariableName=[Stem].minimumNconc
            VariableReference PotentialDMAllocation: VariableName=[Stem].potentialDMAllocation.Structural
          MultiplyFunction Metabolic
            SubtractFunction MetabolicNconc
              VariableReference CritNconc: VariableName=[Stem].criticalNConc
              VariableReference MinNconc: VariableName=[Stem].minimumNconc
            VariableReference PotentialDMAllocation: VariableName=[Stem].potentialDMAllocation.Structural
          StorageNDemandFunction Storage
            VariableReference NitrogenDemandSwitch: VariableName=[Stem].nitrogenDemandSwitch
            VariableReference MaxNconc: VariableName=[Stem].maximumNconc
        RetranslocateNonStructural RetranslocateNitrogen
        BiomassDemand InitialWt
          Constant Structural: FixedValue=0; Units=g/m^2
          Constant Metabolic: FixedValue=0
          Constant Storage: FixedValue=0
      CompositeBiomass AboveGround: DMDOfStructural=0.6
        Propertys=[[Leaf].Live, [Leaf].Dead, [Stem].Live, [Stem].Dead, [Spike].Live, [Spike].Dead, [Grain].Live, [Grain].Dead]
      CompositeBiomass AboveGroundLive: Propertys=[[Leaf].Live, [Stem].Live, [Spike].Live, [Grain].Live]; DMDOfStructural=0.6
      CompositeBiomass AboveGroundDead: Propertys=[[Leaf].Dead, [Stem].Dead, [Spike].Dead, [Grain].Dead]; DMDOfStructural=0.6
      CompositeBiomass BelowGround: Propertys=[[Root].Live, [Root].Dead]; DMDOfStructural=0.6
      CompositeBiomass Total: DMDOfStructural=0.6
        Propertys=[[Leaf].Live, [Leaf].Dead, [Stem].Live, [Stem].Dead, [Root].Live, [Root].Dead, [Spike].Live, [Spike].Dead, [Grain].Live, [Grain].Dead]
      CompositeBiomass TotalLive: DMDOfStructural=0.6
        Propertys=[[Leaf].Live, [Stem].Live, [Root].Live, [Spike].Live, [Grain].Live]
      CompositeBiomass TotalDead: DMDOfStructural=0.6
        Propertys=[[Leaf].Dead, [Stem].Dead, [Root].Dead, [Spike].Dead, [Grain].Dead]
      CompositeBiomass Ear: Propertys=[[Spike].Live, [Grain].Live, [Spike].Dead, [Grain].Dead]; DMDOfStructural=0.6
        Memo
          The Ear composite biomass object includes the Live and dead pools of all organs within the Ear to allow output for total dry matter and Nutrient contents, including total structural, non-structural and metabolic pools.
      CompositeBiomass StemPlusSpike: Propertys=[[Stem].Live, [Spike].Live, [Stem].Dead, [Spike].Dead]; DMDOfStructural=0.6
      CultivarFolder Cultivars
        CultivarFolder New Zealand
          Cultivar Alberic
            Command:
              [Phenology].MinimumLeafNumber.FixedValue = 9
              [Phenology].VrnSensitivity.FixedValue = 7
              [Phenology].PpSensitivity.FixedValue = 3
          Cultivar Amarok
            Command:
              [Phenology].MinimumLeafNumber.FixedValue = 9
              [Phenology].VrnSensitivity.FixedValue = 10
              [Phenology].PpSensitivity.FixedValue = 6
              [Phenology].HeadEmergencePpSensitivity.FixedValue = 5
              [Structure].Phyllochron.BasePhyllochron.FixedValue = 80
          Cultivar Aspiring
            Command:
              [Phenology].MinimumLeafNumber.FixedValue = 9
              [Phenology].VrnSensitivity.FixedValue = 7
              [Phenology].PpSensitivity.FixedValue = 3
          Cultivar BattenWinter
            Command:
              [Phenology].MinimumLeafNumber.FixedValue = 8
              [Phenology].VrnSensitivity.FixedValue = 8
              [Phenology].PpSensitivity.FixedValue = 5
              [Phenology].HeadEmergencePpSensitivity.FixedValue = 3
              [Structure].Phyllochron.BasePhyllochron.FixedValue = 100
              [Leaf].ExtinctionCoeff.VegetativePhase.FixedValue = 0.7
              [Grain].NumberFunction.GrainNumber.GrainsPerGramOfStem.FixedValue = 22
          Cultivar BattenSpring
            Command:
              [Phenology].MinimumLeafNumber.FixedValue = 7
              [Phenology].VrnSensitivity.FixedValue = 0
              [Phenology].PpSensitivity.FixedValue = 5
              [Phenology].HeadEmergencePpSensitivity.FixedValue = 3
              [Structure].Phyllochron.BasePhyllochron.FixedValue = 100
              [Leaf].ExtinctionCoeff.VegetativePhase.FixedValue = 0.7
              [Grain].NumberFunction.GrainNumber.GrainsPerGramOfStem.FixedValue = 22
          Cultivar Centaur
            Command:
              [Phenology].MinimumLeafNumber.FixedValue = 9
              [Phenology].VrnSensitivity.FixedValue = 7
              [Phenology].PpSensitivity.FixedValue = 3
          Cultivar Claire
            Command:
              [Phenology].MinimumLeafNumber.FixedValue = 8
              [Phenology].VrnSensitivity.FixedValue = 8
              [Phenology].PpSensitivity.FixedValue = 8
              [Phenology].HeadEmergencePpSensitivity.FixedValue = 3
              [Structure].Phyllochron.BasePhyllochron.FixedValue = 100
          Cultivar Conquest
            Command:
              [Phenology].MinimumLeafNumber.FixedValue = 7
              [Phenology].VrnSensitivity.FixedValue = 0
              [Phenology].PpSensitivity.FixedValue = 3
              [Structure].Phyllochron.BasePhyllochron.FixedValue = 100
          Cultivar CRWT153
            Command:
              [Phenology].MinimumLeafNumber.FixedValue = 14
              [Phenology].VrnSensitivity.FixedValue = 1
              [Phenology].PpSensitivity.FixedValue = 2
          Cultivar Discovery
            Command:
              [Phenology].MinimumLeafNumber.FixedValue = 8.5
              [Phenology].VrnSensitivity.FixedValue = 0
              [Phenology].PpSensitivity.FixedValue = 0
              [Structure].Phyllochron.BasePhyllochron.FixedValue = 80
              [Leaf].CohortParameters.MaxArea.AreaLargestLeaves.FixedValue = 1600
              [Grain].MaximumPotentialGrainSize.FixedValue = 0.051
              [Grain].NumberFunction.GrainNumber.GrainsPerGramOfStem.FixedValue = 35
              [Leaf].ExtinctionCoeff.VegetativePhase.FixedValue = 0.5
              [Structure].BranchingRate.PotentialBranchingRate.Vegetative.PotentialBranchingRate.XYPairs.Y = 0,0,0,0,4,7,12,20
              [Grain].MaximumNConc.FixedValue = 0.025
              [Grain].MaxNConcDailyGrowth.FixedValue = 0.025
              [Leaf].ExtinctionCoeff.DevelopmentFactor.XYPairs.Y = 1,1,1,1,1.4
              [Leaf].CohortParameters.MinimumNConc.XYPairs.Y = 0.01,0.008, 0.008,0.008, 0.008, 0.008
              [Stem].MinimumNConc.FixedValue = 0.006
              [Spike].DMRetranslocationFactor.ReproductiveGrowth.DMRetranslocationFactor.FixedValue = 0.05
            Memo
              This is a spring wheat with a high grain number and later tillering
          Cultivar Einstein
            Command:
              [Phenology].MinimumLeafNumber.FixedValue = 9
              [Phenology].VrnSensitivity.FixedValue = 7
              [Phenology].PpSensitivity.FixedValue = 3
          Cultivar Exceed
            Command:
              [Phenology].MinimumLeafNumber.FixedValue = 9
              [Phenology].VrnSensitivity.FixedValue = 7
              [Phenology].PpSensitivity.FixedValue = 3
          Cultivar Majestic
            Command:
              [Phenology].MinimumLeafNumber.FixedValue = 9
              [Phenology].VrnSensitivity.FixedValue = 7
              [Phenology].PpSensitivity.FixedValue = 3
          Cultivar Option
            Command:
              [Phenology].MinimumLeafNumber.FixedValue = 9
              [Phenology].VrnSensitivity.FixedValue = 7
              [Phenology].PpSensitivity.FixedValue = 3
          Cultivar Otane
            Command:
              [Phenology].MinimumLeafNumber.FixedValue = 6
              [Phenology].VrnSensitivity.FixedValue = 0
              [Phenology].PpSensitivity.FixedValue = 4
              [Phenology].HeadEmergencePpSensitivity.FixedValue = 2
              [Structure].Phyllochron.BasePhyllochron.FixedValue = 100
          Cultivar Pennant
            Command:
              [Phenology].MinimumLeafNumber.FixedValue = 9
              [Phenology].VrnSensitivity.FixedValue = 7
              [Phenology].PpSensitivity.FixedValue = 3
          Cultivar Regency
            Command:
              [Phenology].MinimumLeafNumber.FixedValue = 9
              [Phenology].VrnSensitivity.FixedValue = 7
              [Phenology].PpSensitivity.FixedValue = 3
          Cultivar Richmond
            Command:
              [Phenology].MinimumLeafNumber.FixedValue = 9
              [Phenology].VrnSensitivity.FixedValue = 7
              [Phenology].PpSensitivity.FixedValue = 3
          Cultivar Robigus
            Command:
              [Phenology].MinimumLeafNumber.FixedValue = 9
              [Phenology].VrnSensitivity.FixedValue = 7
              [Phenology].PpSensitivity.FixedValue = 3
          Cultivar Rongotea
            Command:
              [Phenology].MinimumLeafNumber.FixedValue = 7
              [Phenology].VrnSensitivity.FixedValue = 0
              [Phenology].PpSensitivity.FixedValue = 2
              [Phenology].HeadEmergencePpSensitivity.FixedValue = 3
              [Structure].Phyllochron.BasePhyllochron.FixedValue = 100
          Cultivar Rubric
            Command:
              [Phenology].MinimumLeafNumber.FixedValue = 9
              [Phenology].VrnSensitivity.FixedValue = 7
              [Phenology].PpSensitivity.FixedValue = 3
          Cultivar Sage
            Command:
              [Phenology].MinimumLeafNumber.FixedValue = 9
              [Phenology].VrnSensitivity.FixedValue = 7
              [Phenology].PpSensitivity.FixedValue = 3
          Cultivar Saracen
            Command:
              [Phenology].MinimumLeafNumber.FixedValue = 9
              [Phenology].VrnSensitivity.FixedValue = 7
              [Phenology].PpSensitivity.FixedValue = 3
          Cultivar Savannah
            Command:
              [Phenology].MinimumLeafNumber.FixedValue = 9
              [Phenology].VrnSensitivity.FixedValue = 7
              [Phenology].PpSensitivity.FixedValue = 3
          Cultivar Solstice
            Command:
              [Phenology].MinimumLeafNumber.FixedValue = 9
              [Phenology].VrnSensitivity.FixedValue = 7
              [Phenology].PpSensitivity.FixedValue = 3
          Cultivar Tanker
            Command:
              [Phenology].MinimumLeafNumber.FixedValue = 9
              [Phenology].VrnSensitivity.FixedValue = 7
              [Phenology].PpSensitivity.FixedValue = 3
          Cultivar Tribute
            Command:
              [Phenology].MinimumLeafNumber.FixedValue = 9
              [Phenology].VrnSensitivity.FixedValue = 7
              [Phenology].PpSensitivity.FixedValue = 3
          Cultivar Wakanui
            Command:
              [Phenology].MinimumLeafNumber.FixedValue = 8
              [Phenology].VrnSensitivity.FixedValue = 10
              [Phenology].PpSensitivity.FixedValue = 0
              [Phenology].HeadEmergenceLongDayBase.FixedValue = 4
              [Structure].Phyllochron.BasePhyllochron.FixedValue = 100
              [Phenology].DailyVernalisation.TempResponseProfile.TemperatureResponse.X = 0,1,8
              [Phenology].DailyVernalisation.TempResponseProfile.TemperatureResponse.Y = 0,1.204,0
              [Leaf].ExtinctionCoeff.VegetativePhase.FixedValue = 0.7
              [Grain].NumberFunction.GrainNumber.GrainsPerGramOfStem.FixedValue = 22
              [Grain].MaximumPotentialGrainSize.FixedValue = 0.035
              [Leaf].CohortParameters.MaxArea.AreaLargestLeaves.FixedValue = 3000
          Cultivar Weston
            Command:
              [Phenology].MinimumLeafNumber.FixedValue = 9
              [Phenology].VrnSensitivity.FixedValue = 7
              [Phenology].PpSensitivity.FixedValue = 3
        CultivarFolder Australia
          Cultivar Axe
            Command:
              [Phenology].MinimumLeafNumber.FixedValue = 5
              [Phenology].VrnSensitivity.FixedValue = 0
              [Phenology].PpSensitivity.FixedValue = 4
              [Phenology].HeadEmergencePpSensitivity.FixedValue = 0
              [Structure].Phyllochron.BasePhyllochron.FixedValue = 100
          Cultivar Bolac
            Command:
              [Phenology].MinimumLeafNumber.FixedValue = 6
              [Phenology].VrnSensitivity.FixedValue = 0
              [Phenology].PpSensitivity.FixedValue = 4
              [Structure].Phyllochron.BasePhyllochron.FixedValue = 100
          Cultivar Cunningham
            Command:
              [Phenology].MinimumLeafNumber.FixedValue = 6
              [Phenology].VrnSensitivity.FixedValue = 0
              [Phenology].PpSensitivity.FixedValue = 4
              [Structure].Phyllochron.BasePhyllochron.FixedValue = 100
            Alias Anlace
            Alias Arrivato
            Alias Babbler
            Alias Barham
            Alias Baxter
            Alias Bowie
            Alias Buckley
            Alias Burunga
            Alias Camm
            Alias Carinya
            Alias Chief
            Alias Dagger
            Alias Aurora
            Alias Elmore
            Alias Espada
            Alias Frame
            Alias Gazelle
            Alias Halberd
            Alias Meteor
            Alias Preston
            Alias Saphire
            Alias Scout
            Alias Stiletto
            Alias Wallup
          Cultivar Derrimut
            Command:
              [Phenology].MinimumLeafNumber.FixedValue = 6
              [Phenology].VrnSensitivity.FixedValue = 0
              [Phenology].PpSensitivity.FixedValue = 4
              [Structure].Phyllochron.BasePhyllochron.FixedValue = 100
          Cultivar Gregory
            Command:
              [Phenology].MinimumLeafNumber.FixedValue = 6
              [Phenology].VrnSensitivity.FixedValue = 1
              [Phenology].PpSensitivity.FixedValue = 4
              [Structure].Phyllochron.BasePhyllochron.FixedValue = 100
            Alias Lancer
          Cultivar GattonHartog
            Command:
              [Phenology].MinimumLeafNumber.FixedValue = 8
              [Phenology].VrnSensitivity.FixedValue = 0
              [Phenology].PpSensitivity.FixedValue = 4
          Cultivar Gamenya
            Command:
              [Phenology].MinimumLeafNumber.FixedValue = 5
              [Phenology].VrnSensitivity.FixedValue = 0
              [Phenology].PpSensitivity.FixedValue = 3.5
              [Structure].Phyllochron.BasePhyllochron.FixedValue = 100
              [Phenology].HeadEmergencePpSensitivity.FixedValue = 0
              [Phenology].HeadEmergenceLongDayBase.FixedValue
          Cultivar Gauntlet
            Command:
              [Phenology].MinimumLeafNumber.FixedValue = 5
              [Phenology].VrnSensitivity.FixedValue = 0
              [Phenology].PpSensitivity.FixedValue = 4
              [Structure].Phyllochron.BasePhyllochron.FixedValue = 100
            Alias Braewood
            Alias Chara
            Alias Drysdale
            Alias Envoy
            Alias Estoc
            Alias Giles
            Alias Harper
            Alias Krichauff
            Alias Magenta
            Alias Mitch
            Alias Phantom
            Alias Pugsley
            Alias Sentinel
            Alias Silverstar
            Alias Suneca
            Alias Sunlin
            Alias Sunvale
            Alias Trojan
            Alias Strzelecki
          Cultivar Gladius
            Command:
              [Phenology].MinimumLeafNumber.FixedValue = 6
              [Phenology].VrnSensitivity.FixedValue = 0
              [Phenology].PpSensitivity.FixedValue = 5
              [Structure].Phyllochron.BasePhyllochron.FixedValue = 100
          Cultivar Gutha
            Command:
              [Phenology].MinimumLeafNumber.FixedValue = 6
              [Phenology].VrnSensitivity.FixedValue = 0
              [Phenology].PpSensitivity.FixedValue = 5
              [Structure].Phyllochron.BasePhyllochron.FixedValue = 100
              [Grain].MaximumPotentialGrainSize.FixedValue = 0.041
              [Grain].NumberFunction.GrainNumber.GrainsPerGramOfStem.FixedValue = 17
          Cultivar H45
            Command:
              [Phenology].MinimumLeafNumber.FixedValue = 6
              [Phenology].VrnSensitivity.FixedValue = 0
              [Phenology].PpSensitivity.FixedValue = 4
              [Structure].Phyllochron.BasePhyllochron.FixedValue = 100
              [Grain].NumberFunction.GrainNumber.GrainsPerGramOfStem.FixedValue = 20
            Alias Saintly
            Alias Tamarinrock
            Alias Waagin
            Alias Wollaroi
            Alias Zippy
          Cultivar H46
            Command:
              [Phenology].MinimumLeafNumber.FixedValue = 8
              [Phenology].VrnSensitivity.FixedValue = 0
              [Phenology].PpSensitivity.FixedValue = 4
              [Structure].Phyllochron.BasePhyllochron.FixedValue = 100
          Cultivar Hartog
            Command:
              [Phenology].MinimumLeafNumber.FixedValue = 6
              [Phenology].VrnSensitivity.FixedValue = 0
              [Phenology].PpSensitivity.FixedValue = 5
              [Structure].Phyllochron.BasePhyllochron.FixedValue = 100
              [Grain].MaximumPotentialGrainSize.FixedValue = 0.041
            Alias Annuello
            Alias Carnamah
            Alias Catalina
            Alias Cobra
            Alias Corack
            Alias Correll
            Alias Diamondbird
            Alias Goroke
            Alias Grenade
            Alias Guardian
            Alias Impala
            Alias Justica
            Alias Kord
            Alias Merlin
            Alias Mitre
            Alias Peake
            Alias Shield
            Alias Spitfire
            Alias Sunguard
            Alias Sunstate
            Alias Yallaroi
            Alias Yawa
          Cultivar Mercury
            Command:
              [Phenology].MinimumLeafNumber.FixedValue = 7
              [Phenology].VrnSensitivity.FixedValue = 0
              [Phenology].PpSensitivity.FixedValue = 4
              [Phenology].HeadEmergenceLongDayBase.FixedValue = 3.5
              [Structure].Phyllochron.BasePhyllochron.FixedValue = 80
            Alias Scythe
            Alias Arrino
            Alias BonnieRock
            Alias Bowerbird
            Alias Condo
            Alias Dart
            Alias Dollarbird
            Alias EmuRock
            Alias Hyperno
            Alias Impose
            Alias Kalka
            Alias Kukri
            Alias Hunter
            Alias Arrow
            Alias Ouyen
            Alias Tamaroi
            Alias Katana
            Alias Hume
            Alias Merinda
            Alias Wills
          Cultivar Janz
            Command:
              [Phenology].MinimumLeafNumber.FixedValue = 6
              [Phenology].VrnSensitivity.FixedValue = 1
              [Phenology].PpSensitivity.FixedValue = 4
              [Structure].Phyllochron.BasePhyllochron.FixedValue = 100
          Cultivar Kellalac
            Command:
              [Phenology].MinimumLeafNumber.FixedValue = 8
              [Phenology].VrnSensitivity.FixedValue = 0
              [Phenology].PpSensitivity.FixedValue = 4
              [Structure].Phyllochron.BasePhyllochron.FixedValue = 100
            Alias Beaufort
            Alias Calingiri
            Alias Endure
            Alias Forrest
            Alias Scenario
            Alias Zen
          Cultivar Kennedy
            Command:
              [Phenology].MinimumLeafNumber.FixedValue = 8
              [Phenology].VrnSensitivity.FixedValue = 0
              [Phenology].PpSensitivity.FixedValue = 4
              [Structure].Phyllochron.BasePhyllochron.FixedValue = 100
          Cultivar Lang
            Command:
              [Phenology].MinimumLeafNumber.FixedValue = 6
              [Phenology].VrnSensitivity.FixedValue = 0
              [Phenology].PpSensitivity.FixedValue = 5
              [Structure].Phyllochron.BasePhyllochron.FixedValue = 100
          Cultivar Livingston
            Command:
              [Phenology].MinimumLeafNumber.FixedValue = 5
              [Phenology].VrnSensitivity.FixedValue = 0
              [Phenology].PpSensitivity.FixedValue = 4
              [Structure].Phyllochron.BasePhyllochron.FixedValue = 100
          Cultivar Lincoln
            Command:
              [Phenology].MinimumLeafNumber.FixedValue = 6
              [Phenology].VrnSensitivity.FixedValue = 0
              [Phenology].PpSensitivity.FixedValue = 4
              [Structure].Phyllochron.BasePhyllochron.FixedValue = 100
            Alias Crusader
          Cultivar Mace
            Command:
              [Phenology].MinimumLeafNumber.FixedValue = 6
              [Phenology].VrnSensitivity.FixedValue = 0
              [Phenology].PpSensitivity.FixedValue = 4
              [Structure].Phyllochron.BasePhyllochron.FixedValue = 100
          Cultivar MacKellar
            Command:
              [Phenology].MinimumLeafNumber.FixedValue = 7
              [Phenology].VrnSensitivity.FixedValue = 5
              [Phenology].PpSensitivity.FixedValue = 5
              [Phenology].HeadEmergenceLongDayBase.FixedValue = 3.5
              [Structure].Phyllochron.BasePhyllochron.FixedValue = 100
            Alias Adagio
            Alias Brennan
            Alias Declic
            Alias Revenue
          Cultivar Matong
            Command:
              [Phenology].MinimumLeafNumber.FixedValue = 7
              [Phenology].VrnSensitivity.FixedValue = 1
              [Phenology].PpSensitivity.FixedValue = 4
              [Structure].Phyllochron.BasePhyllochron.FixedValue = 100
              [Grain].NumberFunction.GrainNumber.GrainsPerGramOfStem.FixedValue = 22
          Cultivar McCubbin
            Command:
              [Phenology].MinimumLeafNumber.FixedValue = 8
              [Phenology].VrnSensitivity.FixedValue = 0
              [Phenology].PpSensitivity.FixedValue = 5
              [Structure].Phyllochron.BasePhyllochron.FixedValue = 90
          Cultivar Ruby
            Command:
              [Phenology].MinimumLeafNumber.FixedValue = 8
              [Phenology].VrnSensitivity.FixedValue = 0
              [Phenology].PpSensitivity.FixedValue = 4
              [Structure].Phyllochron.BasePhyllochron.FixedValue = 100
          Cultivar Spear
            Command:
              [Phenology].MinimumLeafNumber.FixedValue = 7
              [Phenology].VrnSensitivity.FixedValue = 0
              [Phenology].PpSensitivity.FixedValue = 4
              [Structure].Phyllochron.BasePhyllochron.FixedValue = 100
              [Grain].MaximumPotentialGrainSize.FixedValue = 0.045
          Cultivar Sunbri
            Command:
              [Phenology].MinimumLeafNumber.FixedValue = 7
              [Phenology].VrnSensitivity.FixedValue = 0
              [Phenology].PpSensitivity.FixedValue = 5
              [Structure].Phyllochron.BasePhyllochron.FixedValue = 100
          Cultivar Sunco
            Command:
              [Phenology].MinimumLeafNumber.FixedValue = 6.5
              [Phenology].VrnSensitivity.FixedValue = 0
              [Phenology].PpSensitivity.FixedValue = 3.5
              [Phenology].HeadEmergencePpSensitivity.FixedValue = 4
              [Structure].Phyllochron.BasePhyllochron.FixedValue = 100
            Alias Advantage
            Alias Bellaroi
            Alias Caparoi
            Alias Ellison
            Alias Suntop
          Cultivar Ventura
            Command:
              [Phenology].MinimumLeafNumber.FixedValue = 8
              [Phenology].VrnSensitivity.FixedValue = 0
              [Phenology].PpSensitivity.FixedValue = 4
              [Structure].Phyllochron.BasePhyllochron.FixedValue = 100
          Cultivar Wedgetail
            Command:
              [Phenology].MinimumLeafNumber.FixedValue = 8
              [Phenology].VrnSensitivity.FixedValue = 0
              [Phenology].PpSensitivity.FixedValue = 4
              [Structure].Phyllochron.BasePhyllochron.FixedValue = 100
            Alias Lorikeet
            Alias Rosella
            Alias Whistler
            Alias Wylah
            Alias Eaglehawk
          Cultivar Westonia
            Command:
              [Phenology].MinimumLeafNumber.FixedValue = 5
              [Phenology].VrnSensitivity.FixedValue = 0
              [Phenology].PpSensitivity.FixedValue = 4
              [Structure].Phyllochron.BasePhyllochron.FixedValue = 100
          Cultivar Wilgoyne
            Command:
              [Phenology].MinimumLeafNumber.FixedValue = 6
              [Phenology].VrnSensitivity.FixedValue = 0
              [Phenology].PpSensitivity.FixedValue = 4
              [Structure].Phyllochron.BasePhyllochron.FixedValue = 100
              [Grain].NumberFunction.GrainNumber.GrainsPerGramOfStem.FixedValue = 20
              [Grain].MaximumPotentialGrainSize.FixedValue = 0.045
          Cultivar Wyalkatchem
            Command:
              [Phenology].MinimumLeafNumber.FixedValue = 8
              [Phenology].VrnSensitivity.FixedValue = 0
              [Phenology].PpSensitivity.FixedValue = 4
              [Structure].Phyllochron.BasePhyllochron.FixedValue = 100
          Cultivar Yitpi
            Command:
              [Phenology].MinimumLeafNumber.FixedValue = 8
              [Phenology].VrnSensitivity.FixedValue = 0
              [Phenology].PpSensitivity.FixedValue = 5
              [Phenology].HeadEmergenceLongDayBase.FixedValue = 2.5
              [Phenology].HeadEmergencePpSensitivity.FixedValue = 5
              [Structure].Phyllochron.BasePhyllochron.FixedValue = 80
          Cultivar Young
            Command:
              [Phenology].MinimumLeafNumber.FixedValue = 8
              [Phenology].VrnSensitivity.FixedValue = 0
              [Phenology].PpSensitivity.FixedValue = 4
              [Structure].Phyllochron.BasePhyllochron.FixedValue = 100
          Cultivar Scepter
            Command:
              [Phenology].MinimumLeafNumber.FixedValue = 6.3
              [Phenology].PpSensitivity.FixedValue = 1.7
              [Phenology].VrnSensitivity.FixedValue = 5.0
          Cultivar Cutlass
            Command:
              [Phenology].MinimumLeafNumber.FixedValue = 5.7
              [Phenology].PpSensitivity.FixedValue = 5.3
              [Phenology].VrnSensitivity.FixedValue = 2.3
          Cultivar Longsword
            Command:
              [Phenology].MinimumLeafNumber.FixedValue = 8.0
              [Phenology].PpSensitivity.FixedValue = 1.7
              [Phenology].VrnSensitivity.FixedValue = 8.0
          Cultivar CSIROW007
            Command:
              [Phenology].MinimumLeafNumber.FixedValue = 7.3
              [Phenology].PpSensitivity.FixedValue = 0.0
              [Phenology].VrnSensitivity.FixedValue = 6.3
          Cultivar CSIROW023
            Command:
              [Phenology].MinimumLeafNumber.FixedValue = 7.0
              [Phenology].PpSensitivity.FixedValue = 1.7
              [Phenology].VrnSensitivity.FixedValue = 5.3
          Cultivar CSIROW073
            Command:
              [Phenology].MinimumLeafNumber.FixedValue = 7.7
              [Phenology].PpSensitivity.FixedValue = 1.3
              [Phenology].VrnSensitivity.FixedValue = 6.3
        CultivarFolder Turkey
          Cultivar Konya
            Command:
              [Phenology].MinimumLeafNumber.FixedValue = 7
              [Phenology].VrnSensitivity.FixedValue = 4
              [Phenology].PpSensitivity.FixedValue = 4
              [Structure].Phyllochron.BasePhyllochron.FixedValue = 100
              [Grain].NumberFunction.GrainNumber.GrainsPerGramOfStem.FixedValue = 16
              [Grain].MaximumPotentialGrainSize.FixedValue = 0.050
              [Grain].MaximumNConc.FixedValue = 0.026
              [Phenology].GrainFilling.Target.FixedValue = 450
              [Stem].DMRetranslocationFactor.ReproductiveGrowth.DMRetranslocationFactor.FixedValue = 0.2
              [Stem].DMDemands.Structural.StructuralFraction.VegetativeGrowth.Fraction.FixedValue = 0.6
              [Leaf].ExtinctionCoeff.VegetativePhase.FixedValue = 0.8
        CultivarFolder China
          Cultivar Keyu13
            Command:
              [Phenology].MinimumLeafNumber.FixedValue = 7
              [Phenology].VrnSensitivity.FixedValue = 5
              [Phenology].PpSensitivity.FixedValue = 3
              [Structure].Phyllochron.BasePhyllochron.FixedValue = 100
        CultivarFolder USA
          Cultivar Yecora
            Command:
              [Phenology].MinimumLeafNumber.FixedValue = 6
              [Phenology].VrnSensitivity.FixedValue = 0
              [Phenology].PpSensitivity.FixedValue = 4
              [Structure].Phyllochron.BasePhyllochron.FixedValue = 90
              [Leaf].CohortParameters.MaxArea.AreaLargestLeaves.FixedValue = 4000
          Cultivar Rex
            Command:
              [Phenology].MinimumLeafNumber.FixedValue = 7
              [Phenology].VrnSensitivity.FixedValue = 6
              [Phenology].PpSensitivity.FixedValue = 4
              [Grain].NumberFunction.GrainNumber.GrainsPerGramOfStem.FixedValue = 18
              [Grain].MaximumNConc.FixedValue = 0.02
          Cultivar Nugaines
            Command:
              [Phenology].MinimumLeafNumber.FixedValue = 7
              [Phenology].VrnSensitivity.FixedValue = 6
              [Phenology].PpSensitivity.FixedValue = 4
              [Grain].NumberFunction.GrainNumber.GrainsPerGramOfStem.FixedValue = 20
              [Grain].MaximumNConc.FixedValue = 0.02
          Cultivar Hyslop
            Command:
              [Phenology].MinimumLeafNumber.FixedValue = 7
              [Phenology].VrnSensitivity.FixedValue = 6
              [Phenology].PpSensitivity.FixedValue = 4
              [Grain].NumberFunction.GrainNumber.GrainsPerGramOfStem.FixedValue = 22
              [Grain].MaximumNConc.FixedValue = 0.02
          Cultivar Stephens
            Command:
              [Phenology].MinimumLeafNumber.FixedValue = 7
              [Phenology].VrnSensitivity.FixedValue = 6
              [Phenology].PpSensitivity.FixedValue = 4
              [Grain].NumberFunction.GrainNumber.GrainsPerGramOfStem.FixedValue = 25
              [Grain].MaximumNConc.FixedValue = 0.02
        CultivarFolder Europe
          Cultivar Dekan
            Command:
              [Phenology].MinimumLeafNumber.FixedValue = 9
              [Phenology].VrnSensitivity.FixedValue = 7
              [Phenology].PpSensitivity.FixedValue = 3
              [Phenology].HeadEmergencePpSensitivity.FixedValue = 3
              [Structure].Phyllochron.BasePhyllochron.FixedValue = 100
              [Leaf].ExtinctionCoeff.VegetativePhase.FixedValue = 0.8
          Cultivar Rosario
            Command:
              [Phenology].MinimumLeafNumber.FixedValue = 9
              [Phenology].VrnSensitivity.FixedValue = 7
              [Phenology].PpSensitivity.FixedValue = 3
              [Phenology].HeadEmergencePpSensitivity.FixedValue = 3
              [Structure].Phyllochron.BasePhyllochron.FixedValue = 100
              [Leaf].ExtinctionCoeff.VegetativePhase.FixedValue = 0.8
          Cultivar Ararat
            Command:
              [Phenology].MinimumLeafNumber.FixedValue = 9
              [Phenology].VrnSensitivity.FixedValue = 7
              [Phenology].PpSensitivity.FixedValue = 3
              [Phenology].HeadEmergencePpSensitivity.FixedValue = 3
              [Structure].Phyllochron.BasePhyllochron.FixedValue = 100
              [Leaf].ExtinctionCoeff.VegetativePhase.FixedValue = 0.8
          Cultivar Tybalt
            Command:
              [Phenology].MinimumLeafNumber.FixedValue = 9
              [Phenology].VrnSensitivity.FixedValue = 0
              [Phenology].PpSensitivity.FixedValue = 0
              [Structure].Phyllochron.BasePhyllochron.FixedValue = 90
        CultivarFolder Africa
          Cultivar HAR1685
            Command:
              [Phenology].MinimumLeafNumber.FixedValue = 7
              [Phenology].VrnSensitivity.FixedValue = 0
              [Phenology].PpSensitivity.FixedValue = 3
              [Structure].Phyllochron.BasePhyllochron.FixedValue = 100
              [Grain].NumberFunction.GrainNumber.GrainsPerGramOfStem.FixedValue = 17
              [Phenology].GrainFilling.Target.FixedValue = 350
        CultivarFolder Iran
          Cultivar Gorgan
            Command:
              [Phenology].MinimumLeafNumber.FixedValue = 7
              [Phenology].VrnSensitivity.FixedValue = 0
              [Phenology].PpSensitivity.FixedValue = 4
              [Structure].Phyllochron.BasePhyllochron.FixedValue = 100
  Summary
  CroptimizR: PredictedTableName=DailyReport; ObservedTableName=Observed; VariableName=Wheat.Leaf.LAI; NoRepetitions=3; Tolerance=1e-05; MaxEval=2
    Parameters:
      {Name=VegetativePhase, Path=.Simulations.Replacements.Wheat.Leaf.ExtinctionCoeff.VegetativePhase.FixedValue, LowerBound=0.4, UpperBound=0.6}
      {Name=RUE, Path=.Simulations.Replacements.Wheat.Leaf.Photosynthesis.RUE.FixedValue, LowerBound=1.4, UpperBound=1.6}
    Folder
      Experiment GattonRowSpacing
        Memo
          This simple experiment was conducted to investigate the light interception and subsequent growth of wheat under different populations invoked using row spacing.  Wheat was sown at Gatton on 15th of June 2011 at 25cm row spacing.  Soon after emergence, alternate rows were removed from selected plots to produce half populations at 50cm row spacing.  A zero N treatment was used to identfy the inherent fertility of the site to assist in model parameterisation.  Data were collected on light interception,  canopy development, biomass accumulation and yield.
        Factors
          Factor RowSpace: Specification=[Sowing]
            Operations 25cm
              2011-06-15  [Wheat].Sow(population:160, cultivar:"Hartog", depth:30, rowSpacing:250);
              2011-08-15  [Fertiliser].Apply(Amount: 100, Type: Fertiliser.Types.UreaN);
              2011-11-05  [Wheat].Harvest();
              2011-11-05  [Wheat].EndCrop();
            Operations 50cm
              2011-06-15  [Wheat].Sow(population:80, cultivar:"Hartog", depth:30, rowSpacing:500);
              2011-08-15  [Fertiliser].Apply(Amount: 100, Type: Fertiliser.Types.UreaN);
              2011-11-05  [Wheat].Harvest();
              2011-11-05  [Wheat].EndCrop();
            Operations N0
              2011-06-15  [Wheat].Sow(population:160, cultivar:"Hartog", depth:30, rowSpacing:250);
              2011-11-05  [Wheat].Harvest();
              2011-11-05  [Wheat].EndCrop();
        Simulation RowSpace
          Clock: Start=2011-05-01; End=2011-11-12
          Summary summaryfile
          Weather: FileName=%root%\Prototypes\CroptimizR\Gatton2011.met
          SoilArbitrator Soil Arbitrator
          Zone Field: Area=1; Slope=0; AspectAngle=0; Altitude=50
            Irrigation
            Fertiliser
            Operations Sowing: same as CroptimizR.Folder.GattonRowSpacing.Factors.RowSpace.N0
            Soil: SoilType=Black Vertosol; Site=Lawes; NearestTown=Lawes, Q 4343; Region=Lockyer; State=Queensland; Country=Australia; NaturalVegetation=Blue Gum, Moreton Bay Ash, Tea Tree; ApsoilNumber=37; Latitude=-27.537; Longitude=152.336; LocationAccuracy=+-20m; DataSource=CSIRO Sustainable Ecosystems, Toowoomba
              Comments=Soil naming structure: \State\Region\Classification-Local Name (Site/district and locator number); oc and ph estimated
              Physical
                Thickness  BD    AirDry  LL15  DUL   SAT
                150        1.32  0.13    0.26  0.41  0.47
                150        1.3   0.208   0.26  0.43  0.48
                300        1.23  0.26    0.26  0.46  0.51
                300        1.27  0.26    0.26  0.44  0.49
                300        1.37  0.25    0.25  0.4   0.45
                300        1.35  0.26    0.26  0.41  0.46
                300        1.35  0.26    0.26  0.38  0.46
                SoilCrop WheatSoil: LL=[0.26, 0.26, 0.26, 0.26, 0.25, 0.29, 0.36]; KL=[0.06, 0.06, 0.06, 0.04, 0.04, 0.02, 0.02]; XF=[1, 1, 1, 1, 1, 1, 1]
              WaterBalance SoilWater: SummerDate=1-Nov; SummerU=6; SummerCona=3.5; WinterDate=1-Apr; WinterU=4; WinterCona=2.5; DiffusConst=40; DiffusSlope=16; Salb=0.12; CN2Bare=73; CNRed=20; CNCov=0.8; Thickness=[150, 150, 300, 300, 300, 300, 300]; SWCON=[0.3, 0.3, 0.3, 0.3, 0.3, 0.3, 0.3]
              Organic: FOMCNRatio=40
                Thickness  Carbon    SoilCNRatio  FBiom  FInert  FOM
                150        0.953846  12           0.04   0.4     347.129
                150        0.953846  12           0.02   0.6     270.344
                300        0.961538  12           0.02   0.8     163.972
                300        0.846154  12           0.02   1       99.4541
                300        0.546154  12           0.01   1       60.322
                300        0.261538  12           0.01   1       36.5871
                300        0.2       12           0.01   1       22.1912
              Chemical
                Thickness  NO3N      NH4N       PH
                150        38.0228   0.380228   8
                150        12.9554   0.15486    8
                300        0.421763  0.0421763  8
                300        0.421763  0.0421763  8
                300        0.421763  0.0421763  8
                300        0.421763  0.0421763  8
                300        0.421763  0.0421763  8
              InitialWater: PercentMethod=0; FractionFull=1
              Sample Initial nitrogen: Thickness=[200, 1800]; SWUnits=Volumetric; OCUnits=Total; PHUnits=Water
              CERESSoilTemperature
              Nutrient
            SurfaceOrganicMatter: InitialResidueName=wheat_stubble; InitialResidueType=wheat; InitialResidueMass=500; InitialStandingFraction=0; InitialCPR=0; InitialCNR=100
            Plant Wheat
            MicroClimate: a_interception=0; b_interception=1; c_interception=0; d_interception=0; soil_albedo=0.23; SoilHeatFluxFraction=0.4; MinimumHeightDiffForNewLayer=0; NightInterceptionFraction=0.5; ReferenceHeight=2
            Manager Automatic irrigation based on water deficit
              FASW = 0
              WaterDeficit = 0
              AutoIrrigationOn = True
              FASWThreshold = 0.9
              FASWDepth = 600
```csharp
using APSIM.Shared.Utilities;
using System.Xml.Serialization;
using Models;
using Models.PMF;
using Models.Soils.Nutrients;
using Models.Soils;
using System.Text;
using System.Collections.Generic;
using Models.Core;
using System;

namespace Models
{
    [Serializable] 
    public class Script : Model
    {
        public double FASW { get; set; }
        public double WaterDeficit  { get; set; }
    
        [Link] Zone zone;
        [Link] Irrigation irrigation;
        [Link] Soil soil;
        
        [Description("Auto irrigation on?")]
        public bool AutoIrrigationOn { get; set; }

        [Description("Threshold fraction available water (0-1)")]
        public double FASWThreshold { get; set; }

        [Description("Soil depth (mm) to which fraction available water is calculated")]
        public double FASWDepth { get; set; }

        [EventSubscribe("DoManagement")]
        private void OnDoManagement(object sender, EventArgs e)
        {
            CalculateFASW();
            if (AutoIrrigationOn)
            {
                if (FASW < FASWThreshold)
                {
                    double amount = 10;
                    irrigation.Apply(WaterDeficit, depth: 0);
                }
            }
        }
        
        private void CalculateFASW()
        {
            double[] LL15 = MathUtilities.Multiply(soil.LL15, soil.Thickness);
            double[] DUL = MathUtilities.Multiply(soil.DUL, soil.Thickness);
        
            int nlayr = GetLayerIndex();
            double cumdep = MathUtilities.Sum(soil.Thickness, 0, nlayr, 0.0);

            double excess_fr = MathUtilities.Divide((cumdep - FASWDepth), soil.Thickness[nlayr], 0.0);

            // note that results may be strange if swdep < ll15
            double avail_sw = (MathUtilities.Sum(soil.Water, 0, nlayr, 0.0)
                              - excess_fr * soil.Water[nlayr])
                              - (MathUtilities.Sum(LL15, 0, nlayr, 0.0)
                              - excess_fr * LL15[nlayr]);


            double pot_avail_sw = (MathUtilities.Sum(DUL, 0, nlayr, 0.0)
                                  - excess_fr * DUL[nlayr])
                                  - (MathUtilities.Sum(LL15, 0, nlayr, 0.0)
                                  - excess_fr * LL15[nlayr]);

            FASW = MathUtilities.Divide(avail_sw, pot_avail_sw, 0.0);
            WaterDeficit = MathUtilities.Constrain(pot_avail_sw - avail_sw, 0.0, 100000);
        }

        private int GetLayerIndex()
        {
            double[] cumThickness = soil.ThicknessCumulative;
            for (int i = 1; i < cumThickness.Length; i++)
            {
                if (FASWDepth < cumThickness[i])
                    return i - 1;
            }
            
            return cumThickness.Length - 1;
        }

    }
}
```
            Report DailyReport: same as Replacements.DailyReport
            Report HarvestReport: EventNames=[Wheat].Harvesting
              VariableNames:
                [Clock].Today
                [Wheat].Phenology.CurrentPhaseName
                [Wheat].Phenology.CurrentStageName
                [Wheat].Phenology.FlagLeafDAS
                [Wheat].Phenology.FloweringDAS
                [Wheat].Phenology.MaturityDAS
                [Wheat].Grain.Wt
                [Wheat].Grain.N
                [Wheat].Grain.Number
                [Wheat].Grain.Size
                [Wheat].Grain.Nconc
                [Wheat].AboveGround.Wt
                [Wheat].AboveGround.N
                [Wheat].Grain.Protein
                [Wheat].Grain.Size
                [Wheat].Structure.HaunStageTerminalSpikelet
                [Wheat].Structure.FinalLeafNumber
                [Wheat].Structure.MainStemPopn
                [Wheat].SowingData.Cultivar
                [Wheat].SowingDate.DayOfYear
                [Wheat].Leaf.CohortMaxSize
                [Clock].StartDate
      Experiment APS6
        Memo
          NOTE: High N treatment logdged.  Final grain sizes were less than expected.
        Factors
          Factor NRate: Specification=[ApplyFertiliser]
            Operations 0
            Operations 40
              1992-06-16  [Fertiliser].Apply(Amount: 40, Type: Fertiliser.Types.NO3N);
            Operations 80
              1992-06-16  [Fertiliser].Apply(Amount: 80, Type: Fertiliser.Types.NO3N);
            Operations 120
              1992-06-16  [Fertiliser].Apply(Amount: 60, Type: Fertiliser.Types.NO3N);
              1992-08-05  [Fertiliser].Apply(Amount: 60, Type: Fertiliser.Types.NO3N);
            Operations 160
              1992-06-16  [Fertiliser].Apply(Amount: 40, Type: Fertiliser.Types.NO3N);
              1992-08-05  [Fertiliser].Apply(Amount: 120, Type: Fertiliser.Types.NO3N);
            Operations 360
              1992-06-16  [Fertiliser].Apply(Amount: 120, Type: Fertiliser.Types.NO3N);
              1992-08-05  [Fertiliser].Apply(Amount: 120, Type: Fertiliser.Types.NO3N);
              1992-09-08  [Fertiliser].Apply(Amount: 120, Type: Fertiliser.Types.NO3N);
        Simulation APS6Base
          Clock: Start=1992-06-14; End=1992-11-17
          Summary summaryfile
          Weather: FileName=%root%\Prototypes\CroptimizR\APS6.met
          Zone paddock: Area=1; Slope=0; AspectAngle=0; Altitude=50
            Irrigation
            Fertiliser
            Soil APS6Field: SoilType=APS6Soil; LocalName=APS6Site; Site=APS6Site; NearestTown=Unknown; Region=Lawes; NaturalVegetation=Unknown; Latitude=0; Longitude=0
              Physical
                Thickness  BD    AirDry  LL15  DUL   SAT
                150        1.38  0.1     0.2   0.38  0.43
                150        1.34  0.1     0.2   0.38  0.43
                300        1.35  0.1     0.22  0.4   0.43
                300        1.5   0.1     0.18  0.4   0.43
                300        1.49  0.1     0.14  0.39  0.42
                300        1.46  0.1     0.2   0.38  0.4
                300        1.46  0.1     0.2   0.38  0.4
                SoilCrop WheatSoil: LL=[0.2, 0.2, 0.22, 0.18, 0.14, 0.25, 0.28]; KL=[0.06, 0.05, 0.05, 0.04, 0.04, 0.06, 0.06]; XF=[1, 1, 1, 1, 1, 1, 1]
              WaterBalance SoilWater: SummerDate=1-Nov; SummerU=6; SummerCona=3.5; WinterDate=1-Apr; WinterU=6; WinterCona=3.5; DiffusConst=88; DiffusSlope=35.4; Salb=0.13; CN2Bare=60; CNRed=20; CNCov=0.8; Slope=0; DischargeWidth=0; CatchmentArea=0
                Thickness  SWCON  KLAT
                150        0.3    0
                150        0.3    0
                300        0.3    0
                300        0.3    0
                300        0.3    0
                300        0.3    0
                300        0.3    0
              Organic: FOMCNRatio=60
                Thickness  Carbon  SoilCNRatio  FBiom  FInert  FOM
                150        2.2     14.5         0.03   0.45    694.258
                150        1.6     14.5         0.02   0.6     540.689
                300        1.15    14.5         0.01   0.78    327.944
                300        1       14.5         0.01   0.9     198.908
                300        0.8     14.5         0.01   0.99    120.644
                300        0.45    14.5         0.01   0.99    73.1743
                300        0.45    14.5         0.01   0.99    44.3824
              Chemical
                Thickness  NO3N  NH4N  PH
                150        1.3   1.3   7.5
                150        0.6   1     8
                300        0.25  1     8
                300        0.2   0.8   8
                300        0.1   0.8   8
                300        0.1   0.5   8
                300        0.1   0.5   8
              Sample Initial Water: Thickness=[150, 150, 300, 300, 300, 300, 300]; SW=[0.326, 0.326, 0.346, 0.333, 0.315, 0.326, 0.326]; SWUnits=Volumetric; OCUnits=Total; PHUnits=Water
              Sample Initial Nitrogen: Thickness=[150, 150, 300, 300, 300, 300, 300]; SWUnits=Volumetric; OCUnits=Total; PHUnits=Water
              CERESSoilTemperature
              Nutrient
            SurfaceOrganicMatter: InitialResidueName=wheat_stubble; InitialResidueType=wheat; InitialResidueMass=500; InitialStandingFraction=0; InitialCPR=0; InitialCNR=100
            Plant Wheat
            Operations ApplyFertiliser
              1992-06-16  [Fertiliser].Apply(Amount: 0, Type: Fertiliser.Types.NO3N);
            Operations IrrigationSchedule
              1992-06-17  [Wheat].Sow(population:121.61, cultivar:"Hartog", depth:30, rowSpacing:250);
              1992-06-24  [Irrigation].Apply(amount:10);
              1992-06-26  [Irrigation].Apply(amount:10);
              1992-07-28  [Irrigation].Apply(amount:30);
              1992-08-05  [Irrigation].Apply(amount:30);
              1992-08-19  [Irrigation].Apply(amount:40);
              1992-08-26  [Irrigation].Apply(amount:40);
              1992-09-09  [Irrigation].Apply(amount:40);
              1992-09-21  [Irrigation].Apply(amount:40);
              1992-10-01  [Irrigation].Apply(amount:50);
              1992-10-07  [Irrigation].Apply(amount:20);
              1992-10-08  [Irrigation].Apply(amount:20);
              1992-10-09  [Irrigation].Apply(amount:20);
              1992-10-13  [Irrigation].Apply(amount:20);
            MicroClimate: a_interception=0; b_interception=1; c_interception=0; d_interception=0; soil_albedo=0.23; SoilHeatFluxFraction=0.4; MinimumHeightDiffForNewLayer=0; NightInterceptionFraction=0.5; ReferenceHeight=2
            Report DailyReport
            Report HarvestReport
            Manager Harvesting
```csharp
using APSIM.Shared.Utilities;
using System.Xml.Serialization;
using Models;
using Models.PMF;
using Models.Soils.Nutrients;
using Models.Soils;
using System.Text;
using System.Collections.Generic;
using Models.Core;
using System;

namespace Models
{
    [Serializable] 
    public class Script : Model
    {
        [Link] Plant Wheat;
        [EventSubscribe("DoManagement")]
        private void OnDoManagement(object sender, EventArgs e)
        {
            if (Wheat.Phenology.CurrentPhaseName == "ReadyForHarvesting")
            {
                Wheat.Harvest();
                Wheat.EndCrop();
            }
        }
    }
}
```
          SoilArbitrator Soil Arbitrator
  DataStore
    ExcelInput Observed: FileNames=[Observed.xlsx]; SheetNames=[Observed, MaxLeafSize]
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