Simulations: Version=2
  Replacements
    Plant Eucalyptus: CropType=Eucalyptus
      AccumulateFunction Age: StartStageName=Emergence; EndStageName=Old
        Constant day: Value=0.00273973
      Phenology
        StageBasedInterpolation StageCode: Stages=[Emergence, EndJuvenile, Maturity, Old]; Codes=[1, 2, 3, 4]; Proportional=true
        Constant ThermalTime: Value=1
        GerminatingPhase Germinating: Start=Sowing; End=Germination
        EmergingPhase Emerging: Start=Germination; End=Emergence; ShootLag=1; ShootRate=0
          VariableReference ThermalTime: VariableName=[Phenology].ThermalTime.Value
        GenericPhase Juvenile: Start=Emergence; End=EndJuvenile
          Constant ThermalTime: Value=1
          Constant Target: Value=365
        GenericPhase Mature: Start=EndJuvenile; End=Maturity
          Constant ThermalTime: Value=1
          Constant Target: Value=1825
        GenericPhase Declining: Start=Maturity; End=Old
          Constant ThermalTime: Value=1
          Constant Target: Value=27010
        EndPhase Old: Start=Old; End=Unused
          Constant ThermalTime: Value=1
      OrganArbitrator Arbitrator: NArbitrationOption=RelativeAllocation; DMArbitrationOption=RelativeAllocation
      CompositeBiomass AboveGround: Propertys=[[Leaf].Live, [Leaf].Dead, [Stem].Live, [Stem].Dead]
      CompositeBiomass BelowGround: Propertys=[[Root].Live, [Root].Dead]
      CompositeBiomass Total
        Propertys=[[Leaf].Live, [Leaf].Dead, [Stem].Live, [Stem].Dead, [Root].Live, [Root].Dead]
      CompositeBiomass TotalLive: Propertys=[[Leaf].Live, [Stem].Live, [Root].Live]
      DivideFunction IndividualTreeLiveWt
        VariableReference LiveWt: VariableName=[Eucalyptus].TotalLive.Wt
        VariableReference Population: VariableName=[Eucalyptus].Population
      CompositeBiomass TotalDead: Propertys=[[Leaf].Dead, [Stem].Dead, [Root].Dead]
      SimpleLeaf Leaf: Albedo=0.18; Gsmax=0.015; R50=150
        zero: BiomassYesterday, LAI, Height, FRGR, PotentialEP, K, KDead, DeltaBiomass, LAIDead, WaterAllocation
        Biomass Live
        Biomass Dead
        MultiplyFunction Photosynthesis
          Constant RUE: Value=1.3
          VariableReference Radiation: VariableName=[Weather].Radn
          LinearInterpolationFunction WaterStressFactor: XProperty=[Leaf].Fw
            XYPairs: X=[0, 1]; Y=[0, 1]
          VariableReference Frgr: VariableName=[Leaf].FRGRFunction.Value
        MinimumFunction FRGRFunction
          AirTemperatureFunction FRGRFunctionTemp
            XYPairs: X=[0, 10, 25, 40]; Y=[0, 1, 1, 0]
        PartitionFractionDemandFunction DMDemandFunction
          Constant PartitionFraction: Value=0.5
        Constant CoverFunction: Value=0.5
        Constant ExtinctionCoefficientFunction: Value=0.5
        LinearInterpolationFunction HeightFunction: XProperty=[Phenology].Stage
          XYPairs: X=[3, 5, 6]; Y=[100, 800, 1200]
        Constant MaximumNConc: Value=0.03
        Constant MinimumNConc: Value=0.01
        Folder BiomassRemovalDefaults
          OrganBiomassRemovalType Harvest: FractionLiveToRemove=0; FractionLiveToResidue=0.3
          OrganBiomassRemovalType Cut: FractionLiveToRemove=0.8; FractionLiveToResidue=0
          OrganBiomassRemovalType Prune: FractionLiveToRemove=0; FractionLiveToResidue=0.6
          OrganBiomassRemovalType Graze: FractionLiveToRemove=0.6; FractionLiveToResidue=0.1
      Root: NuptakeSupply=0
        CompositeBiomass Live: Propertys=[[Root].LayerLive]
        CompositeBiomass Dead: Propertys=[[Root].LayerDead]
        PhaseBasedSwitch NitrogenDemandSwitch: Start=Emergence; End=Old
        AirTemperatureFunction TemperatureEffect
          XYPairs: X=[0, 26, 35]; Y=[1, 1, 1]
        Constant RootFrontVelocity: Value=10
        Constant SenescenceRate: Value=0.005
        PhaseLookup PartitionFraction
          PhaseLookupValue: Start=Emergence; End=Old
            Constant: Value=0.2
        Constant MaximumNConc: Value=0.0041
        Constant MaxDailyNUptake: Value=6
        Constant MinimumNConc: Value=0.004
        LinearInterpolationFunction KLModifier: XProperty=[Leaf].LAI
          XYPairs: X=[0, 3]; Y=[1, 1]
        LinearInterpolationFunction KNO3: XProperty=[Root].RootLengthDenisty
          XYPairs: X=[0, 0.003]; Y=[0.03, 0.03]
        LinearInterpolationFunction KNH4: XProperty=[Root].RootLengthDenisty
          XYPairs: X=[0, 0.003]; Y=[0, 0]
        LinearInterpolationFunction NUptakeSWFactor: XProperty=[Root].RWC
          XYPairs: X=[0, 1]; Y=[0, 1]
        Constant InitialDM: Value=5; Units=g/plant
        Constant SpecificRootLength: Value=100; Units=m/g
      GenericAboveGroundOrgan Stem
        Constant NReallocationFactor: Value=0
        Constant NRetranslocationFactor: Value=0.05
        PhaseBasedSwitch NitrogenDemandSwitch: Start=Emergence; End=Old
        Constant DMRetranslocationFactor: Value=0
        Constant StructuralFraction: Value=1
        PartitionFractionDemandFunction DMDemandFunction
          Constant PartitionFraction: Value=0.2
        Constant MaximumNConc: Value=0.0015
        Constant MinimumNConc: Value=0.0014
        Constant DetachmentRateFunction: Value=0
        Biomass Live
        Biomass Dead
      Cultivar EGrandis
    Plant SCRUM: CropType=SCRUM
      Memo TitlePage
        # SCRUM: the Simple Crop Resource Uptake Model

        _Hamish Brown and Rob Zyskowski, Plant and Food Research, New Zealand_

        This model has been built using the Plant Modelling Framework (PMF) of [brown_plant_2014] to simulate a range of different crops in simulations where water and nitrogen balance are of interest but a fully mechanistic plant model is not needed or is not available. It is a daily time step implementation of the crop model that is used on the Overseer nutrient balance model [Cichota_etal_2010].  It uses simple sigmoidal functions for estimating daily cover and biomass deltas to give realistic water and nitrogen demands. It does not simulate potential yield, this is specified as an input. Yield will be reduced below the specified potential yield if N or water supplies from the soil are insufficient to meet demand. The model has been paramaterised for simulating water and nitrogen balances of cropping rotations in New Zealand (where over 50 different crop types are grown and it is not feasible to produce full crop models for each of these).  Because of this the model is not as generically applicable as full APSIM crop models.   It may be adapted for other purposes and other crop types may be added but the user will need to keep in mind that because it is a simple model the the parameters might need changing for crops in different locations or for crops sown at different times of the year.  Some sensibility testing or validation is recommended before application in different sutuations.

        SCRUM has a simple phenology model which divides the crop growth into three main phases; a vegetative phase when the canopy is expanding, a reproductive phase when product is being formed and a senescing phase when the canopy is contracting.  SCRUM has 4 organ classes to represent different biomass components and the real biomass components that these classes represent changes from crop to crop:
           1. A Simple leaf class called <b>Stover</b> which represents the unharvested parts of the plant.  Generally, this represents the leaf and stem components of the crop but for crops where stem and leaf are part of the harvested product (e.g forages and leafy vegetables) than stover is the residual fraction of leaf and stem that is not harvested.
           2. A Generic organ class called <b>Product</b> which represents the plant parts that are harvested and removed from the field.  This could represent grain, fruits, tubers, leaf or stem depending on what sort of crop is being represented.
           3. A Root organ which extracts water and nitrogen from the soil for plant growth and returns biomass to the soil on harvest
           4. A Nodule organ which is only activated and fixes nitrogen for the legume crops.
        An Arbitrator is also included which determines the allocation of drymatter and nitrogen biomass between each of these organs.

        ##Inclusion in APSIM simulations
        A scrum crop is included in a simulation the same as any other APSIM crop
         * The SCRUM object needs to be dragged or copied from the Crop folder in the tool box into the field of your simulation.
         * It is then planted with a sowing rule
        <pre><code class='language-cs'>
        SCRUM.Sow(cultivar: Wheat_Autumn, population: 1, depth: 10, rowSpacing: 150);
        </code></pre>
          * Note that SCRUM has no notion of population or rowSpacing but these parameters are required by the Sow method so filler values are provided
          * To specify an expected Expected Yield that differs to the defalt value provided, included the following code in a manager script to be executed on the day of sowing.
        <pre><code class='language-cs'>
         zone.Set("[SCRUM].Product.ExpectedYield.Value", ResetValue);
        </code></pre>
        * SCRUM can be Harvested, Cut, Grazed and Pruned like other crops.  Defalt proportions of the biomass in each organ are removed from the sysem and/or added to the fields residue pools.  Note that defalt removal fraction for product on harvest is 0 (becaue it is represented with a generic organ) so more appropriate removal fractions should be sepcified in a manager script as follows:
        <pre><code class='language-cs'>
        [EventSubscribe("Commencing")]
        private void OnSimulationCommencing(object sender, EventArgs e)
        {
          Remove = new RemovalFractions(SCRUM.Organs);
        }
        [EventSubscribe("DoManagement")]
        private void OnDoManagement(object sender, EventArgs e)
        {
          if (Clock.Today.Date == HarvestDate2)
          {
            Remove.SetFractionToRemove("Product", 1.0);
            Remove.SetFractionToRemove("Stover", 0.05);
            Remove.SetFractionToResidue("Stover",0.95)
            SCRUM.Harvest(Remove);
            SCRUM.EndCrop();
          }
        }
         </code></pre>
        * A Remove class as shown above can be sent with Harvest, Cut, Graze and Prune events to specificy the proportions of removals.
         * Once a crop has been ended the field is open to plant another crop using another APSIM crop model or sowing another SCRUM crop.
      Phenology
        AirTemperatureFunction ThermalTime
          Memo Description
            Progression through each of the phenological stages is driven by thermal time.  As temperature increases from zero to 30 degrees, development acelerates and then slows down again above 30 degress
          XYPairs: X=[0, 30, 40]; Y=[0, 30, 0]
        Memo Description1
          As ThermalTime accumulates the crop progresses through the following phases:
        GerminatingPhase Germinating: Start=Sowing; End=Germination
        EmergingPhase Emerging: Start=Germination; End=Emergence; ShootLag=0; ShootRate=0
          VariableReference ThermalTime: VariableName=[Phenology].ThermalTime.Value
          Memo Description
            Currently the duration of the Emergence phase is set to zero because the period of zero cover and biomass production following sowing is accounted for in the cover and biomass accumulation functions.  However this phase is included if parameterisations of other crops in the future wish to give this phase a duration.
        GenericPhase CanopyExpanding: Start=Emergence; End=StartReproductive
          Memo Description
            During this phase the plant only partitions biomass to Root and Stover (leaf and stem) Organs
          Constant Target: Value=1000; Units=<sup>o</sup>Cd
          VariableReference ThermalTime: VariableName=[Phenology].ThermalTime.Value
        GenericPhase YieldIncreasing: Start=StartReproductive; End=StartSenescence
          Memo Description
            During this phase the plant is partitioning biomass to Root, Stover and Product organs.
          Constant Target: Value=600; Units=<sup>o</sup>Cd
          VariableReference ThermalTime: VariableName=[Phenology].ThermalTime.Value
        GenericPhase Senescing: Start=StartSenescence; End=EndReproductive
          Memo Description
            During this phase the plant is partitioning biomass to Root and Product organs and the canopy cover decreases from its maximum to zero
          Constant Target: Value=600; Units=<sup>o</sup>Cd
          VariableReference ThermalTime: VariableName=[Phenology].ThermalTime.Value
        GenericPhase Mature: Start=EndReproductive; End=Maturity
          Constant Target: Value=600; Units=<sup>o</sup>Cd
          VariableReference ThermalTime: VariableName=[Phenology].ThermalTime.Value
          Memo Description
            During this phase the plant has completed its growth and is drying ready for harvest.
        EndPhase ReadyForHarvest: Start=Maturity; End=Unused
          VariableReference ThermalTime: VariableName=[Phenology].ThermalTime.Value
      OrganArbitrator Arbitrator: NArbitrationOption=RelativeAllocation; DMArbitrationOption=RelativeAllocation
      GenericAboveGroundOrgan Product
        Memo Description
          It is the biomass that is removed from the crop at harvest and may include grain, root, leaf, stem, pod or any other organ type depending on the type of crop and how it is harvested.
        Biomass Live
        Biomass Dead
        Constant MaximumNConc: Value=0.012
        Constant MinimumNConc: Value=0.008
        PartitionFractionDemandFunction DMDemandFunction
          PhaseLookup PartitionFraction
            PhaseLookupValue YieldIncreasing: Start=StartReproductive; End=StartSenescence
              SubtractFunction ProductProportion
                Constant One: Value=1
                VariableReference RootFraction: VariableName=[Root].RootProportion.Value
                VariableReference StoverFraction
                  VariableName=[Stover].DMDemandFunction.PartitionFraction.YieldIncreasing.Value
            PhaseLookupValue Senescing: Start=StartSenescence; End=EndReproductive
              SubtractFunction StoverFraction
                Constant One: Value=1
                VariableReference RootFraction: VariableName=[Root].RootProportion.Value
        Constant ExpectedYield: Value=800
          Memo Description
            This is the Product yield (g/m2 fresh weight) that SCRUM will predict provided nitrogen and water supply are non-limiting
        Constant DryMatterContent: Value=0.87
          Memo Description
            This is the dry matter content of the harvested yield and is used to convert fresh yield into *DryYield* which are subsequently used in determining *Ymax* (total biomass production), daily dry matter production, *HarvestIndex* and the *PartitioningFraction* of each organ
        MultiplyFunction DryYield
          Memo Description
            This variable is the product yield of the crop in g/m2 dry weight
          VariableReference FreshYld: VariableName=[Product].ExpectedYield.Value
          VariableReference DMPercent: VariableName=[Product].DryMatterContent.Value
        SubtractFunction WaterContent
          Memo Description
            This is used to convert the total Dry Matter of this organ back to fresh mass once daily partitining is complete.
          Constant One: Value=1
          VariableReference DMcontent: VariableName=[Product].DryMatterContent.Value
        Constant HarvestIndex: Value=0.46
          Memo Description
            This is the Product yield (g/m2 fresh weight) that SCRUM will predict provided nitrogen and water supply are non-limiting
        Folder BiomassRemovalDefaults
          OrganBiomassRemovalType Harvest: FractionLiveToRemove=0.5; FractionLiveToResidue=0.1
          OrganBiomassRemovalType Cut: FractionLiveToRemove=0.8; FractionLiveToResidue=0
          OrganBiomassRemovalType Prune: FractionLiveToRemove=0; FractionLiveToResidue=0.6
          OrganBiomassRemovalType Graze: FractionLiveToRemove=0.6; FractionLiveToResidue=0.2
      SimpleLeaf Stover: Albedo=0.18; Gsmax=0.015; R50=150
        zero: BiomassYesterday, LAI, Height, FRGR, PotentialEP, K, KDead, DeltaBiomass, LAIDead, WaterAllocation
        Memo Description
          Stover represents any part of the crop that is not removed at harvest (i.e not part of the product).
        Biomass Live
        Biomass Dead
        MultiplyFunction Photosynthesis
          DeltaFunction UnStressedBiomass: StartStageName=Emergence
            SigmoidFunction2 Integral
              VariableReference Ymax: VariableName=[Stover].Ymax.Value
              VariableReference XValue: VariableName=[Phenology].AccumulatedEmergedTT
              VariableReference Xo: VariableName=[Stover].XoBiomass.Value
              VariableReference b: VariableName=[Stover].bBiomass.Value
          LinearInterpolationFunction WaterStressFactor: XProperty=[Stover].Fw
            XYPairs: X=[0, 0, 0.5, 1]; Y=[0, 0, 1, 1]
        MinimumFunction FRGRFunction
          AirTemperatureFunction FRGRFunctionTemp
            XYPairs: X=[0, 10, 25, 40]; Y=[0, 1, 1, 0]
        PartitionFractionDemandFunction DMDemandFunction
          Memo Description
            DM demand is based on a simple partitioning coefficients.  At harvest the biomass partitioned to the stover = TotalDM * (1 - RootProportion) * (1 - Harvest index).  However the partitioningFraction is more complicated that this as it partitions more biomass to the stover in the CanopyExpanding Phase and less in the Yield increasing phase to give realistic patterns of accumulation of biomass in the Stover and Product over the duration of the crop
          PhaseLookup PartitionFraction
            PhaseLookupValue Expanding: Start=Emergence; End=StartReproductive
              SubtractFunction DMPartitionCoefficient
                Constant One: Value=1
                VariableReference RootFraction: VariableName=[Root].RootProportion.Value
            PhaseLookupValue YieldIncreasing: Start=StartReproductive; End=StartSenescence
              DivideFunction DMPartitionCoefficient
                SubtractFunction StoverBiomass
                  MultiplyFunction StoverAtMaturity
                    SubtractFunction AboveGroundProportion
                      Constant One: Value=1
                      VariableReference RootFraction: VariableName=[Root].RootProportion.Value
                    SubtractFunction StoverProportion
                      Constant One: Value=1
                      VariableReference HI: VariableName=[Product].HarvestIndex.Value
                    VariableReference BiomassAtMaturity: VariableName=[Stover].TotalBiomassAtMaturity.Value
                  MultiplyFunction StoverAtStartReproductive
                    VariableReference BiomassAtStartReproductive: VariableName=[Stover].TotalBiomassAtStartReproductive.Value
                    SubtractFunction AboveGroundProportion
                      Constant One: Value=1
                      VariableReference RootFraction: VariableName=[Root].RootProportion.Value
                SubtractFunction TotalBiomass
                  VariableReference BiomassAtStartSenescence: VariableName=[Stover].TotalBiomassAtStartSenescence.Value
                  VariableReference BiomassAtStartReproductive: VariableName=[Stover].TotalBiomassAtStartReproductive.Value
        PhaseLookup CoverFunction
          PhaseLookupValue Expanding: Start=Emergence; End=StartSenescence
            SigmoidFunction2 SigCoverFunction
              Constant Ymax: Value=0.97
              VariableReference XValue: VariableName=[Phenology].AccumulatedEmergedTT
              Constant Xo: Value=540
              Constant b: Value=120
          PhaseLookupValue Senescence: Start=StartSenescence; End=Maturity
            MultiplyFunction DecreasingCover
              HoldFunction MaxCover: WhenToHold=StartSenescence
                VariableReference ValueToHold: VariableName=[Stover].CoverGreen
              SubtractFunction ProportionLost
                Constant One: Value=1
                DivideFunction ProportionRemaining
                  SubtractFunction TTSenesce
                    VariableReference AccumulatedThermalTime: VariableName=[Phenology].AccumulatedEmergedTT
                    AddFunction ThermalTimeAtStartSenescence
                      VariableReference CanopyExpandingTT: VariableName=[Phenology].CanopyExpanding.Target.Value
                      VariableReference YieldIncreasingTT: VariableName=[Phenology].YieldIncreasing.Target.Value
                  VariableReference SenescentPhaseDuration: VariableName=[Phenology].Senescing.Target.Value
        Constant ExtinctionCoefficientFunction: Value=0.5
          Memo Description
            The extinction coefficient is used to calculate a LAI value (needed by MicroClimate) from the canopy cover
        LinearInterpolationFunction HeightFunction: XProperty=[Phenology].Stage
          XYPairs: X=[3, 5, 6]; Y=[100, 800, 1200]
        Constant NConc: Value=0.008
        PhaseLookupValue NitrogenDemandSwitch: Start=Emergence; End=StartSenescence
          Constant One: Value=1
        Constant XoBiomass: Value=800
          Memo Description
            Is a coefficient for the potential biomass accumulation function
        Constant bBiomass: Value=800
          Memo Description
            Is another coefficient for the potential biomass accumulation function
        DivideFunction Ymax
          Memo Description
            This variable is the total biomass (g/m2dry weight) that the crop will produce at maturity in the absence of stress
          VariableReference DryYield: VariableName=[Product].DryYield.Value
          SubtractFunction AboveGroundDMProportion
            Constant One: Value=1
            VariableReference RootFraction: VariableName=[Root].RootProportion.Value
          VariableReference HarvestIndex: VariableName=[Product].HarvestIndex.Value
        SigmoidFunction2 TotalBiomassAtStartReproductive
          VariableReference XValue: VariableName=[Phenology].CanopyExpanding.Target.Value
          VariableReference Ymax: VariableName=[Stover].Ymax.Value
          VariableReference Xo: VariableName=[Stover].XoBiomass.Value
          VariableReference b: VariableName=[Stover].bBiomass.Value
        SigmoidFunction2 TotalBiomassAtStartSenescence
          AddFunction XValue
            VariableReference CanopyExpandingTT: VariableName=[Phenology].CanopyExpanding.Target.Value
            VariableReference YieldIncreasingTT: VariableName=[Phenology].YieldIncreasing.Target.Value
          VariableReference Ymax: VariableName=[Stover].Ymax.Value
          VariableReference Xo: VariableName=[Stover].XoBiomass.Value
          VariableReference b: VariableName=[Stover].bBiomass.Value
        SigmoidFunction2 TotalBiomassAtMaturity
          AddFunction XValue
            VariableReference CanopyExpandingTT: VariableName=[Phenology].CanopyExpanding.Target.Value
            VariableReference YieldIncreasingTT: VariableName=[Phenology].YieldIncreasing.Target.Value
            VariableReference SenescingTT: VariableName=[Phenology].Senescing.Target.Value
          VariableReference Ymax: VariableName=[Stover].Ymax.Value
          VariableReference Xo: VariableName=[Stover].XoBiomass.Value
          VariableReference b: VariableName=[Stover].bBiomass.Value
        Folder BiomassRemovalDefaults: same as Replacements.Eucalyptus.Leaf.BiomassRemovalDefaults
      Root: NuptakeSupply=0
        Memo Description
          The root organ demands and is partitioned N and DM and its depth increases through time to provide a water uptake supply
        CompositeBiomass Live: Propertys=[[Root].LayerLive]
        CompositeBiomass Dead: Propertys=[[Root].LayerDead]
        LinearInterpolationFunction KLModifier: XProperty=[Root].LayerMidPointDepth
          XYPairs
            X=[0, 50, 100, 150, 200, 250, 300, 350, 400, 450, 500, 550, 600, 650, 700, 750, 800, 850, 900, 950, 1000, 1050, 1100, 1150, 1200, 1250, 1300, 1350, 1400, 1450]
            Y=[1, 1, 1, 1, 1, 1, 1, 1, 1, 1, 1, 1, 1, 1, 1, 1, 1, 1, 1, 1, 1, 1, 1, 1, 1, 1, 1, 1, 1, 1]
          Memo Description
            This is important in SCRUM as it is set for each species to represent their differences in rooting patterns between crop species.  The values for  each crop type are calculated externally from APSIM using the root depth of the crop and an exponential of the form:

            <pre><code class='language-cs'>
            for (int layer = 0; layer lessthan  Soil.Thickness.Length; layer++)
            {
            if (layer.depth lessthan 305)
             layer.KLModifier = 1;
            else if (layer.depth lessthan Crop.RootDepth)
             layer.KLModifier = 1*exp(-.002*(1500/(Crop.RootDepth-300)*(layer.depth-300)));
            else:
             layer.KLModifier = 0;
            }
            </code></pre>

            This gives KLModifiers that decline exponentially from 1 in the top 300mm of soil to 0 at the crops maximum rooting depth.

            It is important to note that these modifiers are applied to the kl value specified in the SCRUMSoil node under the soil in your field so the values on the soil node should be set to 0.1 throughout the depth of the profile to produce sensible kl values.
        Constant SoilWaterEffect: Value=1
        Constant MaxDailyNUptake: Value=12
        Constant SenescenceRate: Value=0
        Constant MaximumNConc: Value=0.009
        Constant MinimumNConc: Value=0.009
        PhaseBasedSwitch NitrogenDemandSwitch: Start=Germination; End=Maturity
        Constant TemperatureEffect: Value=1
        Constant MaximumRootDepth: Value=1500
        MultiplyFunction RootFrontVelocity
          LessThanFunction RootFrontVelocity
            VariableReference TestVariable: VariableName=[Phenology].AccumulatedEmergedTT
            AddFunction GrowthDuration
              VariableReference CanopyExpandingTT: VariableName=[Phenology].CanopyExpanding.Target.Value
              VariableReference YieldIncreasingTT: VariableName=[Phenology].YieldIncreasing.Target.Value
            DivideFunction IfTrue
              VariableReference MaxRootDepth: VariableName=[Root].MaximumRootDepth.Value
              VariableReference GrowthDuration
                VariableName=[Root].RootFrontVelocity.RootFrontVelocity.GrowthDuration.Value
            Constant IfFalse: Value=0
          VariableReference ThermalTime: VariableName=[Phenology].ThermalTime.Value
        PhaseLookupValue PartitionFraction: Start=Emergence; End=EndReproductive
          VariableReference RootProportion: VariableName=[Root].RootProportion.Value
        Constant RootProportion: Value=0.1
          Memo Description
            This is the proportion of total biomass that is paritioned into the roots and is used to set the partitioning fraction for the roots
        Folder BiomassRemovalDefaults
          OrganBiomassRemovalType Harvest: FractionLiveToRemove=0; FractionLiveToResidue=0.2
          OrganBiomassRemovalType Cut: FractionLiveToRemove=0; FractionLiveToResidue=0.3
          OrganBiomassRemovalType Prune: FractionLiveToRemove=0; FractionLiveToResidue=0.1
          OrganBiomassRemovalType Graze: FractionLiveToRemove=0; FractionLiveToResidue=0.15
        Constant InitialDM: Value=0.2; Units=g/plant
        Constant SpecificRootLength: Value=40; Units=m/g
      Nodule: NFixationOption=None
        Memo Description
          The nodule organ is unparameterised and simply has a switch that is turned on for legume crops (so they can fix what ever N the crop demands) and switched off for non legume crops (which fix no N)
        Biomass Live
        Biomass Dead
        Constant MaximumNConc: Value=0
        Constant MinimumNConc: Value=0
        Folder BiomassRemovalDefaults
          OrganBiomassRemovalType Harvest: FractionLiveToRemove=0; FractionLiveToResidue=0
          OrganBiomassRemovalType Cut: FractionLiveToRemove=0; FractionLiveToResidue=0
          OrganBiomassRemovalType Prune: FractionLiveToRemove=0; FractionLiveToResidue=0
          OrganBiomassRemovalType Graze: FractionLiveToRemove=0; FractionLiveToResidue=0
      CompositeBiomass Total
        Propertys=[[Stover].Live, [Stover].Dead, [Product].Live, [Product].Dead, [Root].Live, [Root].Dead]
      CompositeBiomass AboveGround
        Propertys=[[Stover].Live, [Stover].Dead, [Product].Live, [Product].Dead, [Root].Live, [Root].Dead]
        Memo
          The AboveGround composite biomass object includes Stover and Product organs.
      Cultivar Barley_Spring
        Command:
          [Nodule].NFixationOption = None
          [Phenology].CanopyExpanding.Target.Value = 848.0
          [Phenology].Senescing.Target.Value = 300
          [Phenology].YieldIncreasing.Target.Value = 652.0
          [Product].DryMatterContent.Value = 0.87
          [Product].ExpectedYield.Value = 800
          [Product].HarvestIndex.Value = 0.46
          [Product].MaximumNConc.Value = 0.012
          [Product].MinimumNConc.Value = 0.0084
          [Root].KLModifier.XYPairs.Y = 1,1,1,1,1,1,1,0.819,0.67,0.549,0.449,0.368,0.301,0.247,0.202,0.165,0.135,0.111,0.091,0.074,0,0,0,0,0,0,0,0,0,0
          [Root].MaximumNConc.Value = 0.009
          [Root].MaximumRootDepth.Value = 1000
          [Root].MinimumNConc.Value = 0.009
          [Root].RootProportion.Value = 0.1
          [Stover].CoverFunction.Expanding.SigCoverFunction.Xo.Value = 540
          [Stover].CoverFunction.Expanding.SigCoverFunction.Ymax.Value = 0.96
          [Stover].CoverFunction.Expanding.SigCoverFunction.b.Value = 120
          [Stover].NConc.Value = 0.005
          [Stover].XoBiomass.Value = 900.0
          [Stover].bBiomass.Value = 180.0
      Cultivar Barley_SpringForage
        Command:
          [Nodule].NFixationOption = None
          [Phenology].CanopyExpanding.Target.Value = 326.0
          [Phenology].Senescing.Target.Value = 300
          [Phenology].YieldIncreasing.Target.Value = 1174.0
          [Product].DryMatterContent.Value = 0.4
          [Product].ExpectedYield.Value = 2000
          [Product].HarvestIndex.Value = 0.95
          [Product].MaximumNConc.Value = 0.013
          [Product].MinimumNConc.Value = 0.0091
          [Root].KLModifier.XYPairs.Y = 1,1,1,1,1,1,1,0.905,0.819,0.741,0.67,0.607,0.549,0.497,0.449,0.407,0.368,0.333,0.301,0.273,0.247,0.223,0.202,0.183,0.165,0.15,0.135,0.122,0.111,0.1
          [Root].MaximumNConc.Value = 0.009
          [Root].MaximumRootDepth.Value = 1500
          [Root].MinimumNConc.Value = 0.009
          [Root].RootProportion.Value = 0.1
          [Stover].CoverFunction.Expanding.SigCoverFunction.Xo.Value = 540
          [Stover].CoverFunction.Expanding.SigCoverFunction.Ymax.Value = 0.96
          [Stover].CoverFunction.Expanding.SigCoverFunction.b.Value = 120
          [Stover].NConc.Value = 0.005
          [Stover].XoBiomass.Value = 900.0
          [Stover].bBiomass.Value = 180.0
      Cultivar Beets
        Command:
          [Nodule].NFixationOption = None
          [Phenology].CanopyExpanding.Target.Value = 874.0
          [Phenology].Senescing.Target.Value = 750
          [Phenology].YieldIncreasing.Target.Value = 1076.0
          [Product].DryMatterContent.Value = 0.14
          [Product].ExpectedYield.Value = 5500
          [Product].HarvestIndex.Value = 0.815
          [Product].MaximumNConc.Value = 0.015
          [Product].MinimumNConc.Value = 0.0105
          [Root].KLModifier.XYPairs.Y = 1,1,1,1,1,1,1,0.497,0.247,0.122,0,0,0,0,0,0,0,0,0,0,0,0,0,0,0,0,0,0,0,0
          [Root].MaximumNConc.Value = 0.01
          [Root].MaximumRootDepth.Value = 500
          [Root].MinimumNConc.Value = 0.01
          [Root].RootProportion.Value = 0.1
          [Stover].CoverFunction.Expanding.SigCoverFunction.Xo.Value = 690
          [Stover].CoverFunction.Expanding.SigCoverFunction.Ymax.Value = 0.95
          [Stover].CoverFunction.Expanding.SigCoverFunction.b.Value = 120
          [Stover].NConc.Value = 0.02
          [Stover].XoBiomass.Value = 1350.0
          [Stover].bBiomass.Value = 270.0
      Cultivar Brassica
        Command:
          [Nodule].NFixationOption = None
          [Phenology].CanopyExpanding.Target.Value = nan
          [Phenology].Senescing.Target.Value = 0
          [Phenology].YieldIncreasing.Target.Value = nan
          [Product].DryMatterContent.Value = 1.0
          [Product].ExpectedYield.Value = 800
          [Product].HarvestIndex.Value = 0.0
          [Product].MaximumNConc.Value = 0.03
          [Product].MinimumNConc.Value = 0.021
          [Root].KLModifier.XYPairs.Y = 1,1,1,1,1,1,1,0.741,0.549,0.407,0.301,0.223,0.165,0.122,0,0,0,0,0,0,0,0,0,0,0,0,0,0,0,0
          [Root].MaximumNConc.Value = 0.01
          [Root].MaximumRootDepth.Value = 700
          [Root].MinimumNConc.Value = 0.01
          [Root].RootProportion.Value = 0.1
          [Stover].CoverFunction.Expanding.SigCoverFunction.Xo.Value = 690
          [Stover].CoverFunction.Expanding.SigCoverFunction.Ymax.Value = 0.96
          [Stover].CoverFunction.Expanding.SigCoverFunction.b.Value = 60
          [Stover].NConc.Value = 0.03
          [Stover].XoBiomass.Value = 825.0
          [Stover].bBiomass.Value = 165.0
      Cultivar Broccoli_summer
        Command:
          [Nodule].NFixationOption = None
          [Phenology].CanopyExpanding.Target.Value = 1664.0
          [Phenology].Senescing.Target.Value = 900
          [Phenology].YieldIncreasing.Target.Value = 436.0
          [Product].DryMatterContent.Value = 0.11
          [Product].ExpectedYield.Value = 1200
          [Product].HarvestIndex.Value = 0.2
          [Product].MaximumNConc.Value = 0.035
          [Product].MinimumNConc.Value = 0.0245
          [Root].KLModifier.XYPairs.Y = 1,1,1,1,1,1,1,0.497,0.247,0.122,0,0,0,0,0,0,0,0,0,0,0,0,0,0,0,0,0,0,0,0
          [Root].MaximumNConc.Value = 0.009
          [Root].MaximumRootDepth.Value = 500
          [Root].MinimumNConc.Value = 0.009
          [Root].RootProportion.Value = 0.1
          [Stover].CoverFunction.Expanding.SigCoverFunction.Xo.Value = 450
          [Stover].CoverFunction.Expanding.SigCoverFunction.Ymax.Value = 0.8
          [Stover].CoverFunction.Expanding.SigCoverFunction.b.Value = 120
          [Stover].NConc.Value = 0.038
          [Stover].XoBiomass.Value = 1500.0
          [Stover].bBiomass.Value = 300.0
      Cultivar Broccoli_winter_spring
        Command:
          [Nodule].NFixationOption = None
          [Phenology].CanopyExpanding.Target.Value = 1739.0
          [Phenology].Senescing.Target.Value = 900
          [Phenology].YieldIncreasing.Target.Value = 361.0
          [Product].DryMatterContent.Value = 0.11
          [Product].ExpectedYield.Value = 800
          [Product].HarvestIndex.Value = 0.13
          [Product].MaximumNConc.Value = 0.035
          [Product].MinimumNConc.Value = 0.0245
          [Root].KLModifier.XYPairs.Y = 1,1,1,1,1,1,1,0.497,0.247,0.122,0,0,0,0,0,0,0,0,0,0,0,0,0,0,0,0,0,0,0,0
          [Root].MaximumNConc.Value = 0.009
          [Root].MaximumRootDepth.Value = 500
          [Root].MinimumNConc.Value = 0.009
          [Root].RootProportion.Value = 0.1
          [Stover].CoverFunction.Expanding.SigCoverFunction.Xo.Value = 450
          [Stover].CoverFunction.Expanding.SigCoverFunction.Ymax.Value = 0.8
          [Stover].CoverFunction.Expanding.SigCoverFunction.b.Value = 120
          [Stover].NConc.Value = 0.038
          [Stover].XoBiomass.Value = 1500.0
          [Stover].bBiomass.Value = 300.0
      Cultivar BrusselSprouts
        Command:
          [Nodule].NFixationOption = None
          [Phenology].CanopyExpanding.Target.Value = 1470.0
          [Phenology].Senescing.Target.Value = 900
          [Phenology].YieldIncreasing.Target.Value = 630.0
          [Product].DryMatterContent.Value = 0.2
          [Product].ExpectedYield.Value = 1500
          [Product].HarvestIndex.Value = 0.4
          [Product].MaximumNConc.Value = 0.035
          [Product].MinimumNConc.Value = 0.0245
          [Root].KLModifier.XYPairs.Y = 1,1,1,1,1,1,1,0.497,0.247,0.122,0,0,0,0,0,0,0,0,0,0,0,0,0,0,0,0,0,0,0,0
          [Root].MaximumNConc.Value = 0.009
          [Root].MaximumRootDepth.Value = 500
          [Root].MinimumNConc.Value = 0.009
          [Root].RootProportion.Value = 0.1
          [Stover].CoverFunction.Expanding.SigCoverFunction.Xo.Value = 450
          [Stover].CoverFunction.Expanding.SigCoverFunction.Ymax.Value = 0.8
          [Stover].CoverFunction.Expanding.SigCoverFunction.b.Value = 120
          [Stover].NConc.Value = 0.038
          [Stover].XoBiomass.Value = 1500.0
          [Stover].bBiomass.Value = 300.0
      Cultivar Cabbage_summer
        Command:
          [Nodule].NFixationOption = None
          [Phenology].CanopyExpanding.Target.Value = 1080.0
          [Phenology].Senescing.Target.Value = 900
          [Phenology].YieldIncreasing.Target.Value = 1020.0
          [Product].DryMatterContent.Value = 0.08
          [Product].ExpectedYield.Value = 7000
          [Product].HarvestIndex.Value = 0.75
          [Product].MaximumNConc.Value = 0.026
          [Product].MinimumNConc.Value = 0.0182
          [Root].KLModifier.XYPairs.Y = 1,1,1,1,1,1,1,0.497,0.247,0.122,0,0,0,0,0,0,0,0,0,0,0,0,0,0,0,0,0,0,0,0
          [Root].MaximumNConc.Value = 0.009
          [Root].MaximumRootDepth.Value = 500
          [Root].MinimumNConc.Value = 0.009
          [Root].RootProportion.Value = 0.1
          [Stover].CoverFunction.Expanding.SigCoverFunction.Xo.Value = 360
          [Stover].CoverFunction.Expanding.SigCoverFunction.Ymax.Value = 0.8
          [Stover].CoverFunction.Expanding.SigCoverFunction.b.Value = 120
          [Stover].NConc.Value = 0.03
          [Stover].XoBiomass.Value = 1500.0
          [Stover].bBiomass.Value = 300.0
      Cultivar Cabbage_winter_spring
        Command:
          [Nodule].NFixationOption = None
          [Phenology].CanopyExpanding.Target.Value = 1269.0
          [Phenology].Senescing.Target.Value = 900
          [Phenology].YieldIncreasing.Target.Value = 831.0
          [Product].DryMatterContent.Value = 0.12
          [Product].ExpectedYield.Value = 5000
          [Product].HarvestIndex.Value = 0.6
          [Product].MaximumNConc.Value = 0.026
          [Product].MinimumNConc.Value = 0.0182
          [Root].KLModifier.XYPairs.Y = 1,1,1,1,1,1,1,0.497,0.247,0.122,0,0,0,0,0,0,0,0,0,0,0,0,0,0,0,0,0,0,0,0
          [Root].MaximumNConc.Value = 0.009
          [Root].MaximumRootDepth.Value = 500
          [Root].MinimumNConc.Value = 0.009
          [Root].RootProportion.Value = 0.1
          [Stover].CoverFunction.Expanding.SigCoverFunction.Xo.Value = 360
          [Stover].CoverFunction.Expanding.SigCoverFunction.Ymax.Value = 0.8
          [Stover].CoverFunction.Expanding.SigCoverFunction.b.Value = 120
          [Stover].NConc.Value = 0.03
          [Stover].XoBiomass.Value = 1500.0
          [Stover].bBiomass.Value = 300.0
      Cultivar Carrots
        Command:
          [Nodule].NFixationOption = None
          [Phenology].CanopyExpanding.Target.Value = 955.0
          [Phenology].Senescing.Target.Value = 750
          [Phenology].YieldIncreasing.Target.Value = 2045.0
          [Product].DryMatterContent.Value = 0.12
          [Product].ExpectedYield.Value = 7000
          [Product].HarvestIndex.Value = 0.9
          [Product].MaximumNConc.Value = 0.01
          [Product].MinimumNConc.Value = 0.007
          [Root].KLModifier.XYPairs.Y = 1,1,1,1,1,1,1,0.497,0.247,0.122,0,0,0,0,0,0,0,0,0,0,0,0,0,0,0,0,0,0,0,0
          [Root].MaximumNConc.Value = 0.01
          [Root].MaximumRootDepth.Value = 500
          [Root].MinimumNConc.Value = 0.01
          [Root].RootProportion.Value = 0.1
          [Stover].CoverFunction.Expanding.SigCoverFunction.Xo.Value = 690
          [Stover].CoverFunction.Expanding.SigCoverFunction.Ymax.Value = 0.9
          [Stover].CoverFunction.Expanding.SigCoverFunction.b.Value = 120
          [Stover].NConc.Value = 0.02
          [Stover].XoBiomass.Value = 1875.0
          [Stover].bBiomass.Value = 375.0
      Cultivar Cauliflower_summer
        Command:
          [Nodule].NFixationOption = None
          [Phenology].CanopyExpanding.Target.Value = 1422.0
          [Phenology].Senescing.Target.Value = 900
          [Phenology].YieldIncreasing.Target.Value = 678.0
          [Product].DryMatterContent.Value = 0.09
          [Product].ExpectedYield.Value = 5000
          [Product].HarvestIndex.Value = 0.45
          [Product].MaximumNConc.Value = 0.035
          [Product].MinimumNConc.Value = 0.0245
          [Root].KLModifier.XYPairs.Y = 1,1,1,1,1,1,1,0.497,0.247,0.122,0,0,0,0,0,0,0,0,0,0,0,0,0,0,0,0,0,0,0,0
          [Root].MaximumNConc.Value = 0.009
          [Root].MaximumRootDepth.Value = 500
          [Root].MinimumNConc.Value = 0.009
          [Root].RootProportion.Value = 0.1
          [Stover].CoverFunction.Expanding.SigCoverFunction.Xo.Value = 450
          [Stover].CoverFunction.Expanding.SigCoverFunction.Ymax.Value = 0.8
          [Stover].CoverFunction.Expanding.SigCoverFunction.b.Value = 120
          [Stover].NConc.Value = 0.038
          [Stover].XoBiomass.Value = 1500.0
          [Stover].bBiomass.Value = 300.0
      Cultivar Cauliflower_winter_spring
        Command:
          [Nodule].NFixationOption = None
          [Phenology].CanopyExpanding.Target.Value = 1566.0
          [Phenology].Senescing.Target.Value = 900
          [Phenology].YieldIncreasing.Target.Value = 534.0
          [Product].DryMatterContent.Value = 0.1
          [Product].ExpectedYield.Value = 3000
          [Product].HarvestIndex.Value = 0.3
          [Product].MaximumNConc.Value = 0.035
          [Product].MinimumNConc.Value = 0.0245
          [Root].KLModifier.XYPairs.Y = 1,1,1,1,1,1,1,0.497,0.247,0.122,0,0,0,0,0,0,0,0,0,0,0,0,0,0,0,0,0,0,0,0
          [Root].MaximumNConc.Value = 0.009
          [Root].MaximumRootDepth.Value = 500
          [Root].MinimumNConc.Value = 0.009
          [Root].RootProportion.Value = 0.1
          [Stover].CoverFunction.Expanding.SigCoverFunction.Xo.Value = 450
          [Stover].CoverFunction.Expanding.SigCoverFunction.Ymax.Value = 0.8
          [Stover].CoverFunction.Expanding.SigCoverFunction.b.Value = 120
          [Stover].NConc.Value = 0.038
          [Stover].XoBiomass.Value = 1500.0
          [Stover].bBiomass.Value = 300.0
      Cultivar Clover_1styear
        Command:
          [Nodule].NFixationOption = Majic
          [Phenology].CanopyExpanding.Target.Value = 2141.0
          [Phenology].Senescing.Target.Value = 300
          [Phenology].YieldIncreasing.Target.Value = 1159.0
          [Product].DryMatterContent.Value = 0.85
          [Product].ExpectedYield.Value = 60
          [Product].HarvestIndex.Value = 0.09
          [Product].MaximumNConc.Value = 0.035
          [Product].MinimumNConc.Value = 0.0245
          [Root].KLModifier.XYPairs.Y = 1,1,1,1,1,1,1,0.819,0.67,0.549,0.449,0.368,0.301,0.247,0.202,0.165,0.135,0.111,0,0,0,0,0,0,0,0,0,0,0,0
          [Root].MaximumNConc.Value = 0.01
          [Root].MaximumRootDepth.Value = 900
          [Root].MinimumNConc.Value = 0.01
          [Root].RootProportion.Value = 0.1
          [Stover].CoverFunction.Expanding.SigCoverFunction.Xo.Value = 750
          [Stover].CoverFunction.Expanding.SigCoverFunction.Ymax.Value = 0.8
          [Stover].CoverFunction.Expanding.SigCoverFunction.b.Value = 120
          [Stover].NConc.Value = 0.04
          [Stover].XoBiomass.Value = 1800.0
          [Stover].bBiomass.Value = 360.0
      Cultivar Clover_2ndyear
        Command:
          [Nodule].NFixationOption = Majic
          [Phenology].CanopyExpanding.Target.Value = 1249.0
          [Phenology].Senescing.Target.Value = 300
          [Phenology].YieldIncreasing.Target.Value = 551.0
          [Product].DryMatterContent.Value = 0.85
          [Product].ExpectedYield.Value = 60
          [Product].HarvestIndex.Value = 0.09
          [Product].MaximumNConc.Value = 0.035
          [Product].MinimumNConc.Value = 0.0245
          [Root].KLModifier.XYPairs.Y = 1,1,1,1,1,1,1,0.819,0.67,0.549,0.449,0.368,0.301,0.247,0.202,0.165,0.135,0.111,0,0,0,0,0,0,0,0,0,0,0,0
          [Root].MaximumNConc.Value = 0.01
          [Root].MaximumRootDepth.Value = 900
          [Root].MinimumNConc.Value = 0.01
          [Root].RootProportion.Value = 0.1
          [Stover].CoverFunction.Expanding.SigCoverFunction.Xo.Value = 300
          [Stover].CoverFunction.Expanding.SigCoverFunction.Ymax.Value = 0.96
          [Stover].CoverFunction.Expanding.SigCoverFunction.b.Value = 120
          [Stover].NConc.Value = 0.04
          [Stover].XoBiomass.Value = 1050.0
          [Stover].bBiomass.Value = 210.0
      Cultivar Dried_Beans
        Command:
          [Nodule].NFixationOption = Majic
          [Phenology].CanopyExpanding.Target.Value = 755.0
          [Phenology].Senescing.Target.Value = 300
          [Phenology].YieldIncreasing.Target.Value = 595.0
          [Product].DryMatterContent.Value = 0.86
          [Product].ExpectedYield.Value = 350
          [Product].HarvestIndex.Value = 0.5
          [Product].MaximumNConc.Value = 0.035
          [Product].MinimumNConc.Value = 0.0245
          [Root].KLModifier.XYPairs.Y = 1,1,1,1,1,1,1,0.741,0.549,0.407,0.301,0.223,0.165,0.122,0,0,0,0,0,0,0,0,0,0,0,0,0,0,0,0
          [Root].MaximumNConc.Value = 0.015
          [Root].MaximumRootDepth.Value = 700
          [Root].MinimumNConc.Value = 0.015
          [Root].RootProportion.Value = 0.1
          [Stover].CoverFunction.Expanding.SigCoverFunction.Xo.Value = 690
          [Stover].CoverFunction.Expanding.SigCoverFunction.Ymax.Value = 0.96
          [Stover].CoverFunction.Expanding.SigCoverFunction.b.Value = 60
          [Stover].NConc.Value = 0.02
          [Stover].XoBiomass.Value = 825.0
          [Stover].bBiomass.Value = 165.0
      Cultivar Dried_Peas
        Command:
          [Nodule].NFixationOption = Majic
          [Phenology].CanopyExpanding.Target.Value = 755.0
          [Phenology].Senescing.Target.Value = 300
          [Phenology].YieldIncreasing.Target.Value = 595.0
          [Product].DryMatterContent.Value = 0.86
          [Product].ExpectedYield.Value = 350
          [Product].HarvestIndex.Value = 0.5
          [Product].MaximumNConc.Value = 0.035
          [Product].MinimumNConc.Value = 0.0245
          [Root].KLModifier.XYPairs.Y = 1,1,1,1,1,1,1,0.905,0.819,0.741,0.67,0.607,0.549,0.497,0.449,0.407,0.368,0.333,0.301,0.273,0.247,0.223,0.202,0.183,0,0,0,0,0,0
          [Root].MaximumNConc.Value = 0.015
          [Root].MaximumRootDepth.Value = 1200
          [Root].MinimumNConc.Value = 0.015
          [Root].RootProportion.Value = 0.1
          [Stover].CoverFunction.Expanding.SigCoverFunction.Xo.Value = 690
          [Stover].CoverFunction.Expanding.SigCoverFunction.Ymax.Value = 0.96
          [Stover].CoverFunction.Expanding.SigCoverFunction.b.Value = 60
          [Stover].NConc.Value = 0.02
          [Stover].XoBiomass.Value = 825.0
          [Stover].bBiomass.Value = 165.0
      Cultivar Green_Beans
        Command:
          [Nodule].NFixationOption = Majic
          [Phenology].CanopyExpanding.Target.Value = 782.0
          [Phenology].Senescing.Target.Value = 300
          [Phenology].YieldIncreasing.Target.Value = 568.0
          [Product].DryMatterContent.Value = 0.21
          [Product].ExpectedYield.Value = 800
          [Product].HarvestIndex.Value = 0.45
          [Product].MaximumNConc.Value = 0.035
          [Product].MinimumNConc.Value = 0.0245
          [Root].KLModifier.XYPairs.Y = 1,1,1,1,1,1,1,0.741,0.549,0.407,0.301,0.223,0.165,0.122,0,0,0,0,0,0,0,0,0,0,0,0,0,0,0,0
          [Root].MaximumNConc.Value = 0.015
          [Root].MaximumRootDepth.Value = 700
          [Root].MinimumNConc.Value = 0.015
          [Root].RootProportion.Value = 0.1
          [Stover].CoverFunction.Expanding.SigCoverFunction.Xo.Value = 690
          [Stover].CoverFunction.Expanding.SigCoverFunction.Ymax.Value = 0.8
          [Stover].CoverFunction.Expanding.SigCoverFunction.b.Value = 60
          [Stover].NConc.Value = 0.03
          [Stover].XoBiomass.Value = 825.0
          [Stover].bBiomass.Value = 165.0
      Cultivar Green_Peas
        Command:
          [Nodule].NFixationOption = Majic
          [Phenology].CanopyExpanding.Target.Value = 782.0
          [Phenology].Senescing.Target.Value = 300
          [Phenology].YieldIncreasing.Target.Value = 568.0
          [Product].DryMatterContent.Value = 0.21
          [Product].ExpectedYield.Value = 800
          [Product].HarvestIndex.Value = 0.45
          [Product].MaximumNConc.Value = 0.035
          [Product].MinimumNConc.Value = 0.0245
          [Root].KLModifier.XYPairs.Y = 1,1,1,1,1,1,1,0.905,0.819,0.741,0.67,0.607,0.549,0.497,0.449,0.407,0.368,0.333,0.301,0.273,0.247,0.223,0.202,0.183,0,0,0,0,0,0
          [Root].MaximumNConc.Value = 0.015
          [Root].MaximumRootDepth.Value = 1200
          [Root].MinimumNConc.Value = 0.015
          [Root].RootProportion.Value = 0.1
          [Stover].CoverFunction.Expanding.SigCoverFunction.Xo.Value = 690
          [Stover].CoverFunction.Expanding.SigCoverFunction.Ymax.Value = 0.96
          [Stover].CoverFunction.Expanding.SigCoverFunction.b.Value = 60
          [Stover].NConc.Value = 0.03
          [Stover].XoBiomass.Value = 825.0
          [Stover].bBiomass.Value = 165.0
      Cultivar Kale
        Command:
          [Nodule].NFixationOption = None
          [Phenology].CanopyExpanding.Target.Value = 1150.0
          [Phenology].Senescing.Target.Value = 0
          [Phenology].YieldIncreasing.Target.Value = 1850.0
          [Product].DryMatterContent.Value = 0.16
          [Product].ExpectedYield.Value = 7500
          [Product].HarvestIndex.Value = 0.7
          [Product].MaximumNConc.Value = 0.03
          [Product].MinimumNConc.Value = 0.02
          [Root].KLModifier.XYPairs.Y = 1,1,1,1,1,1,1,1.0,1.0,1.0,1.0,1.0,1.0,1.0,1.0,1.0,1.0,1.0,1.0,1.0,1.0,1.0,1.0,1.0,1.0,1.0,1.0,1.0,1.0,1.0
          [Root].MaximumNConc.Value = 0.008
          [Root].MaximumRootDepth.Value = 3000
          [Root].MinimumNConc.Value = 0.008
          [Root].RootProportion.Value = 0.1
          [Stover].CoverFunction.Expanding.SigCoverFunction.Xo.Value = 867
          [Stover].CoverFunction.Expanding.SigCoverFunction.Ymax.Value = 0.96
          [Stover].CoverFunction.Expanding.SigCoverFunction.b.Value = 141
          [Stover].NConc.Value = 0.01
          [Stover].XoBiomass.Value = 1500.0
          [Stover].bBiomass.Value = 300.0
      Cultivar Kumara
        Command:
          [Nodule].NFixationOption = None
          [Phenology].CanopyExpanding.Target.Value = 716.0
          [Phenology].Senescing.Target.Value = 750
          [Phenology].YieldIncreasing.Target.Value = 1234.0
          [Product].DryMatterContent.Value = 0.23
          [Product].ExpectedYield.Value = 5000
          [Product].HarvestIndex.Value = 0.89
          [Product].MaximumNConc.Value = 0.018
          [Product].MinimumNConc.Value = 0.0126
          [Root].KLModifier.XYPairs.Y = 1,1,1,1,1,1,1,0.497,0.247,0.122,0,0,0,0,0,0,0,0,0,0,0,0,0,0,0,0,0,0,0,0
          [Root].MaximumNConc.Value = 0.01
          [Root].MaximumRootDepth.Value = 500
          [Root].MinimumNConc.Value = 0.01
          [Root].RootProportion.Value = 0.1
          [Stover].CoverFunction.Expanding.SigCoverFunction.Xo.Value = 690
          [Stover].CoverFunction.Expanding.SigCoverFunction.Ymax.Value = 0.96
          [Stover].CoverFunction.Expanding.SigCoverFunction.b.Value = 120
          [Stover].NConc.Value = 0.02
          [Stover].XoBiomass.Value = 1350.0
          [Stover].bBiomass.Value = 270.0
      Cultivar Lentils: same as Replacements.SCRUM.Dried_Beans
      Cultivar Lettuce
        Command:
          [Nodule].NFixationOption = None
          [Phenology].CanopyExpanding.Target.Value = 1299.0
          [Phenology].Senescing.Target.Value = 600
          [Phenology].YieldIncreasing.Target.Value = 2001.0
          [Product].DryMatterContent.Value = 0.05
          [Product].ExpectedYield.Value = 5000
          [Product].HarvestIndex.Value = 0.8
          [Product].MaximumNConc.Value = 0.026
          [Product].MinimumNConc.Value = 0.0182
          [Root].KLModifier.XYPairs.Y = 1,1,1,1,1,1,1,0.497,0.247,0.122,0,0,0,0,0,0,0,0,0,0,0,0,0,0,0,0,0,0,0,0
          [Root].MaximumNConc.Value = 0.009
          [Root].MaximumRootDepth.Value = 500
          [Root].MinimumNConc.Value = 0.009
          [Root].RootProportion.Value = 0.1
          [Stover].CoverFunction.Expanding.SigCoverFunction.Xo.Value = 360
          [Stover].CoverFunction.Expanding.SigCoverFunction.Ymax.Value = 0.8
          [Stover].CoverFunction.Expanding.SigCoverFunction.b.Value = 120
          [Stover].NConc.Value = 0.03
          [Stover].XoBiomass.Value = 1950.0
          [Stover].bBiomass.Value = 390.0
      Cultivar Lupins
        Command:
          [Nodule].NFixationOption = Majic
          [Phenology].CanopyExpanding.Target.Value = nan
          [Phenology].Senescing.Target.Value = 0
          [Phenology].YieldIncreasing.Target.Value = nan
          [Product].DryMatterContent.Value = 1.0
          [Product].ExpectedYield.Value = 1200
          [Product].HarvestIndex.Value = 0.0
          [Product].MaximumNConc.Value = 0.03
          [Product].MinimumNConc.Value = 0.021
          [Root].KLModifier.XYPairs.Y = 1,1,1,1,1,1,1,0.741,0.549,0.407,0.301,0.223,0.165,0.122,0,0,0,0,0,0,0,0,0,0,0,0,0,0,0,0
          [Root].MaximumNConc.Value = 0.015
          [Root].MaximumRootDepth.Value = 700
          [Root].MinimumNConc.Value = 0.015
          [Root].RootProportion.Value = 0.1
          [Stover].CoverFunction.Expanding.SigCoverFunction.Xo.Value = 690
          [Stover].CoverFunction.Expanding.SigCoverFunction.Ymax.Value = 0.96
          [Stover].CoverFunction.Expanding.SigCoverFunction.b.Value = 60
          [Stover].NConc.Value = 0.03
          [Stover].XoBiomass.Value = 825.0
          [Stover].bBiomass.Value = 165.0
      Cultivar Maize_Long
        Command:
          [Nodule].NFixationOption = None
          [Phenology].CanopyExpanding.Target.Value = 1923.0
          [Phenology].Senescing.Target.Value = 1800
          [Phenology].YieldIncreasing.Target.Value = 477.0
          [Product].DryMatterContent.Value = 0.87
          [Product].ExpectedYield.Value = 1350
          [Product].HarvestIndex.Value = 0.5
          [Product].MaximumNConc.Value = 0.014
          [Product].MinimumNConc.Value = 0.0098
          [Root].KLModifier.XYPairs.Y = 1,1,1,1,1,1,1,0.905,0.819,0.741,0.67,0.607,0.549,0.497,0.449,0.407,0.368,0.333,0.301,0.273,0.247,0.223,0.202,0.183,0.165,0.15,0.135,0.122,0.111,0.1
          [Root].MaximumNConc.Value = 0.007
          [Root].MaximumRootDepth.Value = 1500
          [Root].MinimumNConc.Value = 0.007
          [Root].RootProportion.Value = 0.1
          [Stover].CoverFunction.Expanding.SigCoverFunction.Xo.Value = 1050
          [Stover].CoverFunction.Expanding.SigCoverFunction.Ymax.Value = 0.92
          [Stover].CoverFunction.Expanding.SigCoverFunction.b.Value = 180
          [Stover].NConc.Value = 0.007
          [Stover].XoBiomass.Value = 2100.0
          [Stover].bBiomass.Value = 420.0
      Cultivar Maize_Med
        Command:
          [Nodule].NFixationOption = None
          [Phenology].CanopyExpanding.Target.Value = 1785.0
          [Phenology].Senescing.Target.Value = 1650
          [Phenology].YieldIncreasing.Target.Value = 465.0
          [Product].DryMatterContent.Value = 0.87
          [Product].ExpectedYield.Value = 1330
          [Product].HarvestIndex.Value = 0.5
          [Product].MaximumNConc.Value = 0.014
          [Product].MinimumNConc.Value = 0.0098
          [Root].KLModifier.XYPairs.Y = 1,1,1,1,1,1,1,0.905,0.819,0.741,0.67,0.607,0.549,0.497,0.449,0.407,0.368,0.333,0.301,0.273,0.247,0.223,0.202,0.183,0.165,0.15,0.135,0.122,0.111,0.1
          [Root].MaximumNConc.Value = 0.007
          [Root].MaximumRootDepth.Value = 1500
          [Root].MinimumNConc.Value = 0.007
          [Root].RootProportion.Value = 0.1
          [Stover].CoverFunction.Expanding.SigCoverFunction.Xo.Value = 960
          [Stover].CoverFunction.Expanding.SigCoverFunction.Ymax.Value = 0.85
          [Stover].CoverFunction.Expanding.SigCoverFunction.b.Value = 180
          [Stover].NConc.Value = 0.007
          [Stover].XoBiomass.Value = 1950.0
          [Stover].bBiomass.Value = 390.0
      Cultivar Maize_Short
        Command:
          [Nodule].NFixationOption = None
          [Phenology].CanopyExpanding.Target.Value = 1648.0
          [Phenology].Senescing.Target.Value = 1500
          [Phenology].YieldIncreasing.Target.Value = 452.0
          [Product].DryMatterContent.Value = 0.87
          [Product].ExpectedYield.Value = 1220
          [Product].HarvestIndex.Value = 0.5
          [Product].MaximumNConc.Value = 0.014
          [Product].MinimumNConc.Value = 0.0098
          [Root].KLModifier.XYPairs.Y = 1,1,1,1,1,1,1,0.905,0.819,0.741,0.67,0.607,0.549,0.497,0.449,0.407,0.368,0.333,0.301,0.273,0.247,0.223,0.202,0.183,0.165,0.15,0.135,0.122,0.111,0.1
          [Root].MaximumNConc.Value = 0.007
          [Root].MaximumRootDepth.Value = 1500
          [Root].MinimumNConc.Value = 0.007
          [Root].RootProportion.Value = 0.1
          [Stover].CoverFunction.Expanding.SigCoverFunction.Xo.Value = 900
          [Stover].CoverFunction.Expanding.SigCoverFunction.Ymax.Value = 0.75
          [Stover].CoverFunction.Expanding.SigCoverFunction.b.Value = 180
          [Stover].NConc.Value = 0.007
          [Stover].XoBiomass.Value = 1800.0
          [Stover].bBiomass.Value = 360.0
      Cultivar Maizesilage
        Command:
          [Nodule].NFixationOption = None
          [Phenology].CanopyExpanding.Target.Value = 652.0
          [Phenology].Senescing.Target.Value = 1350
          [Phenology].YieldIncreasing.Target.Value = 1598.0
          [Product].DryMatterContent.Value = 0.35
          [Product].ExpectedYield.Value = 5000
          [Product].HarvestIndex.Value = 0.95
          [Product].MaximumNConc.Value = 0.014
          [Product].MinimumNConc.Value = 0.0098
          [Root].KLModifier.XYPairs.Y = 1,1,1,1,1,1,1,0.905,0.819,0.741,0.67,0.607,0.549,0.497,0.449,0.407,0.368,0.333,0.301,0.273,0.247,0.223,0.202,0.183,0.165,0.15,0.135,0.122,0.111,0.1
          [Root].MaximumNConc.Value = 0.007
          [Root].MaximumRootDepth.Value = 1500
          [Root].MinimumNConc.Value = 0.007
          [Root].RootProportion.Value = 0.1
          [Stover].CoverFunction.Expanding.SigCoverFunction.Xo.Value = 960
          [Stover].CoverFunction.Expanding.SigCoverFunction.Ymax.Value = 0.85
          [Stover].CoverFunction.Expanding.SigCoverFunction.b.Value = 180
          [Stover].NConc.Value = 0.007
          [Stover].XoBiomass.Value = 1800.0
          [Stover].bBiomass.Value = 360.0
      Cultivar Mustard
        Command:
          [Nodule].NFixationOption = None
          [Phenology].CanopyExpanding.Target.Value = nan
          [Phenology].Senescing.Target.Value = 0
          [Phenology].YieldIncreasing.Target.Value = nan
          [Product].DryMatterContent.Value = 1.0
          [Product].ExpectedYield.Value = 700
          [Product].HarvestIndex.Value = 0.0
          [Product].MaximumNConc.Value = 0.03
          [Product].MinimumNConc.Value = 0.021
          [Root].KLModifier.XYPairs.Y = 1,1,1,1,1,1,1,0.741,0.549,0.407,0.301,0.223,0.165,0.122,0,0,0,0,0,0,0,0,0,0,0,0,0,0,0,0
          [Root].MaximumNConc.Value = 0.01
          [Root].MaximumRootDepth.Value = 700
          [Root].MinimumNConc.Value = 0.01
          [Root].RootProportion.Value = 0.1
          [Stover].CoverFunction.Expanding.SigCoverFunction.Xo.Value = 690
          [Stover].CoverFunction.Expanding.SigCoverFunction.Ymax.Value = 0.96
          [Stover].CoverFunction.Expanding.SigCoverFunction.b.Value = 60
          [Stover].NConc.Value = 0.03
          [Stover].XoBiomass.Value = 825.0
          [Stover].bBiomass.Value = 165.0
      Cultivar Oats&Rye
        Command:
          [Nodule].NFixationOption = None
          [Phenology].CanopyExpanding.Target.Value = nan
          [Phenology].Senescing.Target.Value = 0
          [Phenology].YieldIncreasing.Target.Value = nan
          [Product].DryMatterContent.Value = 1.0
          [Product].ExpectedYield.Value = 1000
          [Product].HarvestIndex.Value = 0.0
          [Product].MaximumNConc.Value = 0.012
          [Product].MinimumNConc.Value = 0.0084
          [Root].KLModifier.XYPairs.Y = 1,1,1,1,1,1,1,0.819,0.67,0.549,0.449,0.368,0.301,0.247,0.202,0.165,0.135,0.111,0.091,0.074,0,0,0,0,0,0,0,0,0,0
          [Root].MaximumNConc.Value = 0.009
          [Root].MaximumRootDepth.Value = 1000
          [Root].MinimumNConc.Value = 0.009
          [Root].RootProportion.Value = 0.1
          [Stover].CoverFunction.Expanding.SigCoverFunction.Xo.Value = 540
          [Stover].CoverFunction.Expanding.SigCoverFunction.Ymax.Value = 0.96
          [Stover].CoverFunction.Expanding.SigCoverFunction.b.Value = 120
          [Stover].NConc.Value = 0.005
          [Stover].XoBiomass.Value = 900.0
          [Stover].bBiomass.Value = 180.0
      Cultivar Oats_Autumn
        Command:
          [Nodule].NFixationOption = None
          [Phenology].CanopyExpanding.Target.Value = 1546.0
          [Phenology].Senescing.Target.Value = 600
          [Phenology].YieldIncreasing.Target.Value = 854.0
          [Product].DryMatterContent.Value = 0.87
          [Product].ExpectedYield.Value = 800
          [Product].HarvestIndex.Value = 0.32
          [Product].MaximumNConc.Value = 0.013
          [Product].MinimumNConc.Value = 0.0091
          [Root].KLModifier.XYPairs.Y = 1,1,1,1,1,1,1,0.905,0.819,0.741,0.67,0.607,0.549,0.497,0.449,0.407,0.368,0.333,0.301,0.273,0.247,0.223,0.202,0.183,0.165,0.15,0.135,0.122,0.111,0.1
          [Root].MaximumNConc.Value = 0.009
          [Root].MaximumRootDepth.Value = 1500
          [Root].MinimumNConc.Value = 0.009
          [Root].RootProportion.Value = 0.1
          [Stover].CoverFunction.Expanding.SigCoverFunction.Xo.Value = 540
          [Stover].CoverFunction.Expanding.SigCoverFunction.Ymax.Value = 0.96
          [Stover].CoverFunction.Expanding.SigCoverFunction.b.Value = 120
          [Stover].NConc.Value = 0.005
          [Stover].XoBiomass.Value = 1500.0
          [Stover].bBiomass.Value = 300.0
      Cultivar Oats_AutumnForage
        Command:
          [Nodule].NFixationOption = Majic
          [Phenology].CanopyExpanding.Target.Value = 543.0
          [Phenology].Senescing.Target.Value = 600
          [Phenology].YieldIncreasing.Target.Value = 1857.0
          [Product].DryMatterContent.Value = 0.4
          [Product].ExpectedYield.Value = 3000
          [Product].HarvestIndex.Value = 0.95
          [Product].MaximumNConc.Value = 0.013
          [Product].MinimumNConc.Value = 0.0091
          [Root].KLModifier.XYPairs.Y = 1,1,1,1,1,1,1,0.905,0.819,0.741,0.67,0.607,0.549,0.497,0.449,0.407,0.368,0.333,0.301,0.273,0.247,0.223,0.202,0.183,0.165,0.15,0.135,0.122,0.111,0.1
          [Root].MaximumNConc.Value = 0.009
          [Root].MaximumRootDepth.Value = 1500
          [Root].MinimumNConc.Value = 0.009
          [Root].RootProportion.Value = 0.1
          [Stover].CoverFunction.Expanding.SigCoverFunction.Xo.Value = 540
          [Stover].CoverFunction.Expanding.SigCoverFunction.Ymax.Value = 0.96
          [Stover].CoverFunction.Expanding.SigCoverFunction.b.Value = 120
          [Stover].NConc.Value = 0.005
          [Stover].XoBiomass.Value = 1500.0
          [Stover].bBiomass.Value = 300.0
      Cultivar Oats_Spring
        Command:
          [Nodule].NFixationOption = None
          [Phenology].CanopyExpanding.Target.Value = 939.0
          [Phenology].Senescing.Target.Value = 300
          [Phenology].YieldIncreasing.Target.Value = 561.0
          [Product].DryMatterContent.Value = 0.87
          [Product].ExpectedYield.Value = 400
          [Product].HarvestIndex.Value = 0.3
          [Product].MaximumNConc.Value = 0.012
          [Product].MinimumNConc.Value = 0.0084
          [Root].KLModifier.XYPairs.Y = 1,1,1,1,1,1,1,0.819,0.67,0.549,0.449,0.368,0.301,0.247,0.202,0.165,0.135,0.111,0.091,0.074,0,0,0,0,0,0,0,0,0,0
          [Root].MaximumNConc.Value = 0.009
          [Root].MaximumRootDepth.Value = 1000
          [Root].MinimumNConc.Value = 0.009
          [Root].RootProportion.Value = 0.1
          [Stover].CoverFunction.Expanding.SigCoverFunction.Xo.Value = 540
          [Stover].CoverFunction.Expanding.SigCoverFunction.Ymax.Value = 0.96
          [Stover].CoverFunction.Expanding.SigCoverFunction.b.Value = 120
          [Stover].NConc.Value = 0.005
          [Stover].XoBiomass.Value = 900.0
          [Stover].bBiomass.Value = 180.0
      Cultivar Oats_SpringForage: same as Replacements.SCRUM.Barley_SpringForage
      Cultivar Onions
        Command:
          [Nodule].NFixationOption = None
          [Phenology].CanopyExpanding.Target.Value = 899.0
          [Phenology].Senescing.Target.Value = 750
          [Phenology].YieldIncreasing.Target.Value = 1051.0
          [Product].DryMatterContent.Value = 0.11
          [Product].ExpectedYield.Value = 7000
          [Product].HarvestIndex.Value = 0.8
          [Product].MaximumNConc.Value = 0.014
          [Product].MinimumNConc.Value = 0.0098
          [Root].KLModifier.XYPairs.Y = 1,1,1,1,1,1,1,0.223,0,0,0,0,0,0,0,0,0,0,0,0,0,0,0,0,0,0,0,0,0,0
          [Root].MaximumNConc.Value = 0.01
          [Root].MaximumRootDepth.Value = 400
          [Root].MinimumNConc.Value = 0.01
          [Root].RootProportion.Value = 0.1
          [Stover].CoverFunction.Expanding.SigCoverFunction.Xo.Value = 780
          [Stover].CoverFunction.Expanding.SigCoverFunction.Ymax.Value = 0.8
          [Stover].CoverFunction.Expanding.SigCoverFunction.b.Value = 120
          [Stover].NConc.Value = 0.02
          [Stover].XoBiomass.Value = 1350.0
          [Stover].bBiomass.Value = 270.0
      Cultivar Parsnips
        Command:
          [Nodule].NFixationOption = None
          [Phenology].CanopyExpanding.Target.Value = 489.0
          [Phenology].Senescing.Target.Value = 750
          [Phenology].YieldIncreasing.Target.Value = 1461.0
          [Product].DryMatterContent.Value = 0.17
          [Product].ExpectedYield.Value = 4400
          [Product].HarvestIndex.Value = 0.95
          [Product].MaximumNConc.Value = 0.014
          [Product].MinimumNConc.Value = 0.0098
          [Root].KLModifier.XYPairs.Y = 1,1,1,1,1,1,1,0.497,0.247,0.122,0,0,0,0,0,0,0,0,0,0,0,0,0,0,0,0,0,0,0,0
          [Root].MaximumNConc.Value = 0.01
          [Root].MaximumRootDepth.Value = 500
          [Root].MinimumNConc.Value = 0.01
          [Root].RootProportion.Value = 0.1
          [Stover].CoverFunction.Expanding.SigCoverFunction.Xo.Value = 690
          [Stover].CoverFunction.Expanding.SigCoverFunction.Ymax.Value = 0.95
          [Stover].CoverFunction.Expanding.SigCoverFunction.b.Value = 120
          [Stover].NConc.Value = 0.02
          [Stover].XoBiomass.Value = 1350.0
          [Stover].bBiomass.Value = 270.0
      Cultivar Phacelia
        Command:
          [Nodule].NFixationOption = None
          [Phenology].CanopyExpanding.Target.Value = nan
          [Phenology].Senescing.Target.Value = 0
          [Phenology].YieldIncreasing.Target.Value = nan
          [Product].DryMatterContent.Value = 1.0
          [Product].ExpectedYield.Value = 500
          [Product].HarvestIndex.Value = 0.0
          [Product].MaximumNConc.Value = 0.03
          [Product].MinimumNConc.Value = 0.021
          [Root].KLModifier.XYPairs.Y = 1,1,1,1,1,1,1,0.741,0.549,0.407,0.301,0.223,0.165,0.122,0,0,0,0,0,0,0,0,0,0,0,0,0,0,0,0
          [Root].MaximumNConc.Value = 0.01
          [Root].MaximumRootDepth.Value = 700
          [Root].MinimumNConc.Value = 0.01
          [Root].RootProportion.Value = 0.1
          [Stover].CoverFunction.Expanding.SigCoverFunction.Xo.Value = 690
          [Stover].CoverFunction.Expanding.SigCoverFunction.Ymax.Value = 0.96
          [Stover].CoverFunction.Expanding.SigCoverFunction.b.Value = 60
          [Stover].NConc.Value = 0.03
          [Stover].XoBiomass.Value = 825.0
          [Stover].bBiomass.Value = 165.0
      Cultivar Potatoes_Long
        Command:
          [Nodule].NFixationOption = None
          [Phenology].CanopyExpanding.Target.Value = 690.0
          [Phenology].Senescing.Target.Value = 600
          [Phenology].YieldIncreasing.Target.Value = 1560.0
          [Product].DryMatterContent.Value = 0.22
          [Product].ExpectedYield.Value = 7100
          [Product].HarvestIndex.Value = 0.911
          [Product].MaximumNConc.Value = 0.018
          [Product].MinimumNConc.Value = 0.0126
          [Root].KLModifier.XYPairs.Y = 1,1,1,1,1,1,1,0.819,0.67,0.549,0.449,0.368,0.301,0.247,0.202,0.165,0.135,0.111,0.091,0.074,0,0,0,0,0,0,0,0,0,0
          [Root].MaximumNConc.Value = 0.01
          [Root].MaximumRootDepth.Value = 1000
          [Root].MinimumNConc.Value = 0.01
          [Root].RootProportion.Value = 0.1
          [Stover].CoverFunction.Expanding.SigCoverFunction.Xo.Value = 690
          [Stover].CoverFunction.Expanding.SigCoverFunction.Ymax.Value = 0.96
          [Stover].CoverFunction.Expanding.SigCoverFunction.b.Value = 60
          [Stover].NConc.Value = 0.02
          [Stover].XoBiomass.Value = 1425.0
          [Stover].bBiomass.Value = 285.0
      Cultivar Potatoes_Medium
        Command:
          [Nodule].NFixationOption = None
          [Phenology].CanopyExpanding.Target.Value = 638.0
          [Phenology].Senescing.Target.Value = 600
          [Phenology].YieldIncreasing.Target.Value = 1312.0
          [Product].DryMatterContent.Value = 0.22
          [Product].ExpectedYield.Value = 6400
          [Product].HarvestIndex.Value = 0.904
          [Product].MaximumNConc.Value = 0.018
          [Product].MinimumNConc.Value = 0.0126
          [Root].KLModifier.XYPairs.Y = 1,1,1,1,1,1,1,0.819,0.67,0.549,0.449,0.368,0.301,0.247,0.202,0.165,0.135,0.111,0.091,0.074,0,0,0,0,0,0,0,0,0,0
          [Root].MaximumNConc.Value = 0.01
          [Root].MaximumRootDepth.Value = 1000
          [Root].MinimumNConc.Value = 0.01
          [Root].RootProportion.Value = 0.1
          [Stover].CoverFunction.Expanding.SigCoverFunction.Xo.Value = 690
          [Stover].CoverFunction.Expanding.SigCoverFunction.Ymax.Value = 0.96
          [Stover].CoverFunction.Expanding.SigCoverFunction.b.Value = 60
          [Stover].NConc.Value = 0.02
          [Stover].XoBiomass.Value = 1275.0
          [Stover].bBiomass.Value = 255.0
      Cultivar Potatoes_Short
        Command:
          [Nodule].NFixationOption = None
          [Phenology].CanopyExpanding.Target.Value = 590.0
          [Phenology].Senescing.Target.Value = 600
          [Phenology].YieldIncreasing.Target.Value = 1060.0
          [Product].DryMatterContent.Value = 0.23
          [Product].ExpectedYield.Value = 5300
          [Product].HarvestIndex.Value = 0.893
          [Product].MaximumNConc.Value = 0.018
          [Product].MinimumNConc.Value = 0.0126
          [Root].KLModifier.XYPairs.Y = 1,1,1,1,1,1,1,0.819,0.67,0.549,0.449,0.368,0.301,0.247,0.202,0.165,0.135,0.111,0.091,0.074,0,0,0,0,0,0,0,0,0,0
          [Root].MaximumNConc.Value = 0.01
          [Root].MaximumRootDepth.Value = 1000
          [Root].MinimumNConc.Value = 0.01
          [Root].RootProportion.Value = 0.1
          [Stover].CoverFunction.Expanding.SigCoverFunction.Xo.Value = 690
          [Stover].CoverFunction.Expanding.SigCoverFunction.Ymax.Value = 0.96
          [Stover].CoverFunction.Expanding.SigCoverFunction.b.Value = 60
          [Stover].NConc.Value = 0.02
          [Stover].XoBiomass.Value = 1125.0
          [Stover].bBiomass.Value = 225.0
      Cultivar Rape
        Command:
          [Nodule].NFixationOption = None
          [Phenology].CanopyExpanding.Target.Value = 999.0
          [Phenology].Senescing.Target.Value = 0
          [Phenology].YieldIncreasing.Target.Value = 2001.0
          [Product].DryMatterContent.Value = 0.13
          [Product].ExpectedYield.Value = 4615
          [Product].HarvestIndex.Value = 0.8
          [Product].MaximumNConc.Value = 0.03
          [Product].MinimumNConc.Value = 0.02
          [Root].KLModifier.XYPairs.Y = 1,1,1,1,1,1,1,1.0,1.0,1.0,1.0,1.0,1.0,1.0,1.0,1.0,1.0,1.0,1.0,1.0,1.0,1.0,1.0,1.0,1.0,1.0,1.0,1.0,1.0,1.0
          [Root].MaximumNConc.Value = 0.008
          [Root].MaximumRootDepth.Value = 2400
          [Root].MinimumNConc.Value = 0.008
          [Root].RootProportion.Value = 0.1
          [Stover].CoverFunction.Expanding.SigCoverFunction.Xo.Value = 770
          [Stover].CoverFunction.Expanding.SigCoverFunction.Ymax.Value = 0.96
          [Stover].CoverFunction.Expanding.SigCoverFunction.b.Value = 57
          [Stover].NConc.Value = 0.01
          [Stover].XoBiomass.Value = 1500.0
          [Stover].bBiomass.Value = 300.0
      Cultivar RyeCorn_Autumn
        Command:
          [Nodule].NFixationOption = None
          [Phenology].CanopyExpanding.Target.Value = 543.0
          [Phenology].Senescing.Target.Value = 600
          [Phenology].YieldIncreasing.Target.Value = 1857.0
          [Product].DryMatterContent.Value = 0.4
          [Product].ExpectedYield.Value = 3000
          [Product].HarvestIndex.Value = 0.95
          [Product].MaximumNConc.Value = 0.013
          [Product].MinimumNConc.Value = 0.0091
          [Root].KLModifier.XYPairs.Y = 1,1,1,1,1,1,1,0.905,0.819,0.741,0.67,0.607,0.549,0.497,0.449,0.407,0.368,0.333,0.301,0.273,0.247,0.223,0.202,0.183,0.165,0.15,0.135,0.122,0.111,0.1
          [Root].MaximumNConc.Value = 0.009
          [Root].MaximumRootDepth.Value = 1500
          [Root].MinimumNConc.Value = 0.009
          [Root].RootProportion.Value = 0.1
          [Stover].CoverFunction.Expanding.SigCoverFunction.Xo.Value = 540
          [Stover].CoverFunction.Expanding.SigCoverFunction.Ymax.Value = 0.96
          [Stover].CoverFunction.Expanding.SigCoverFunction.b.Value = 120
          [Stover].NConc.Value = 0.005
          [Stover].XoBiomass.Value = 1500.0
          [Stover].bBiomass.Value = 300.0
      Cultivar RyeCorn_Spring: same as Replacements.SCRUM.Barley_SpringForage
      Cultivar Ryegrass_1styear
        Command:
          [Nodule].NFixationOption = None
          [Phenology].CanopyExpanding.Target.Value = 1590.0
          [Phenology].Senescing.Target.Value = 450
          [Phenology].YieldIncreasing.Target.Value = 660.0
          [Product].DryMatterContent.Value = 0.85
          [Product].ExpectedYield.Value = 150
          [Product].HarvestIndex.Value = 0.105
          [Product].MaximumNConc.Value = 0.015
          [Product].MinimumNConc.Value = 0.0105
          [Root].KLModifier.XYPairs.Y = 1,1,1,1,1,1,1,0.741,0.549,0.407,0.301,0.223,0.165,0.122,0,0,0,0,0,0,0,0,0,0,0,0,0,0,0,0
          [Root].MaximumNConc.Value = 0.01
          [Root].MaximumRootDepth.Value = 700
          [Root].MinimumNConc.Value = 0.01
          [Root].RootProportion.Value = 0.1
          [Stover].CoverFunction.Expanding.SigCoverFunction.Xo.Value = 540
          [Stover].CoverFunction.Expanding.SigCoverFunction.Ymax.Value = 0.96
          [Stover].CoverFunction.Expanding.SigCoverFunction.b.Value = 120
          [Stover].NConc.Value = 0.015
          [Stover].XoBiomass.Value = 1350.0
          [Stover].bBiomass.Value = 270.0
      Cultivar Ryegrass_2ndyear
        Command:
          [Nodule].NFixationOption = None
          [Phenology].CanopyExpanding.Target.Value = 1237.0
          [Phenology].Senescing.Target.Value = 300
          [Phenology].YieldIncreasing.Target.Value = 563.0
          [Product].DryMatterContent.Value = 0.85
          [Product].ExpectedYield.Value = 150
          [Product].HarvestIndex.Value = 0.105
          [Product].MaximumNConc.Value = 0.015
          [Product].MinimumNConc.Value = 0.0105
          [Root].KLModifier.XYPairs.Y = 1,1,1,1,1,1,1,0.741,0.549,0.407,0.301,0.223,0.165,0.122,0,0,0,0,0,0,0,0,0,0,0,0,0,0,0,0
          [Root].MaximumNConc.Value = 0.01
          [Root].MaximumRootDepth.Value = 700
          [Root].MinimumNConc.Value = 0.01
          [Root].RootProportion.Value = 0.1
          [Stover].CoverFunction.Expanding.SigCoverFunction.Xo.Value = 300
          [Stover].CoverFunction.Expanding.SigCoverFunction.Ymax.Value = 0.96
          [Stover].CoverFunction.Expanding.SigCoverFunction.b.Value = 120
          [Stover].NConc.Value = 0.015
          [Stover].XoBiomass.Value = 1050.0
          [Stover].bBiomass.Value = 210.0
      Cultivar Spinach
        Command:
          [Nodule].NFixationOption = None
          [Phenology].CanopyExpanding.Target.Value = 1150.0
          [Phenology].Senescing.Target.Value = 900
          [Phenology].YieldIncreasing.Target.Value = 950.0
          [Product].DryMatterContent.Value = 0.05
          [Product].ExpectedYield.Value = 2200
          [Product].HarvestIndex.Value = 0.7
          [Product].MaximumNConc.Value = 0.03
          [Product].MinimumNConc.Value = 0.021
          [Root].KLModifier.XYPairs.Y = 1,1,1,1,1,1,1,0.497,0.247,0.122,0,0,0,0,0,0,0,0,0,0,0,0,0,0,0,0,0,0,0,0
          [Root].MaximumNConc.Value = 0.009
          [Root].MaximumRootDepth.Value = 500
          [Root].MinimumNConc.Value = 0.009
          [Root].RootProportion.Value = 0.1
          [Stover].CoverFunction.Expanding.SigCoverFunction.Xo.Value = 360
          [Stover].CoverFunction.Expanding.SigCoverFunction.Ymax.Value = 0.8
          [Stover].CoverFunction.Expanding.SigCoverFunction.b.Value = 120
          [Stover].NConc.Value = 0.015
          [Stover].XoBiomass.Value = 1500.0
          [Stover].bBiomass.Value = 300.0
      Cultivar Squash
        Command:
          [Nodule].NFixationOption = None
          [Phenology].CanopyExpanding.Target.Value = 899.0
          [Phenology].Senescing.Target.Value = 300
          [Phenology].YieldIncreasing.Target.Value = 1501.0
          [Product].DryMatterContent.Value = 0.2
          [Product].ExpectedYield.Value = 2500
          [Product].HarvestIndex.Value = 0.8
          [Product].MaximumNConc.Value = 0.02
          [Product].MinimumNConc.Value = 0.014
          [Root].KLModifier.XYPairs.Y = 1,1,1,1,1,1,1,0.497,0.247,0.122,0,0,0,0,0,0,0,0,0,0,0,0,0,0,0,0,0,0,0,0
          [Root].MaximumNConc.Value = 0.01
          [Root].MaximumRootDepth.Value = 500
          [Root].MinimumNConc.Value = 0.01
          [Root].RootProportion.Value = 0.1
          [Stover].CoverFunction.Expanding.SigCoverFunction.Xo.Value = 600
          [Stover].CoverFunction.Expanding.SigCoverFunction.Ymax.Value = 0.94
          [Stover].CoverFunction.Expanding.SigCoverFunction.b.Value = 90
          [Stover].NConc.Value = 0.02
          [Stover].XoBiomass.Value = 1350.0
          [Stover].bBiomass.Value = 270.0
      Cultivar Sweetcorn
        Command:
          [Nodule].NFixationOption = None
          [Phenology].CanopyExpanding.Target.Value = 794.0
          [Phenology].Senescing.Target.Value = 300
          [Phenology].YieldIncreasing.Target.Value = 706.0
          [Product].DryMatterContent.Value = 0.5
          [Product].ExpectedYield.Value = 2500
          [Product].HarvestIndex.Value = 0.55
          [Product].MaximumNConc.Value = 0.014
          [Product].MinimumNConc.Value = 0.0098
          [Root].KLModifier.XYPairs.Y = 1,1,1,1,1,1,1,0.819,0.67,0.549,0.449,0.368,0.301,0.247,0.202,0.165,0.135,0.111,0.091,0.074,0,0,0,0,0,0,0,0,0,0
          [Root].MaximumNConc.Value = 0.007
          [Root].MaximumRootDepth.Value = 1000
          [Root].MinimumNConc.Value = 0.007
          [Root].RootProportion.Value = 0.1
          [Stover].CoverFunction.Expanding.SigCoverFunction.Xo.Value = 540
          [Stover].CoverFunction.Expanding.SigCoverFunction.Ymax.Value = 0.75
          [Stover].CoverFunction.Expanding.SigCoverFunction.b.Value = 120
          [Stover].NConc.Value = 0.009
          [Stover].XoBiomass.Value = 900.0
          [Stover].bBiomass.Value = 180.0
      Cultivar Tomato
        Command:
          [Nodule].NFixationOption = None
          [Phenology].CanopyExpanding.Target.Value = 1236.0
          [Phenology].Senescing.Target.Value = 750
          [Phenology].YieldIncreasing.Target.Value = 714.0
          [Product].DryMatterContent.Value = 0.05
          [Product].ExpectedYield.Value = 10000
          [Product].HarvestIndex.Value = 0.5
          [Product].MaximumNConc.Value = 0.02
          [Product].MinimumNConc.Value = 0.014
          [Root].KLModifier.XYPairs.Y = 1,1,1,1,1,1,1,0.497,0.247,0.122,0,0,0,0,0,0,0,0,0,0,0,0,0,0,0,0,0,0,0,0
          [Root].MaximumNConc.Value = 0.01
          [Root].MaximumRootDepth.Value = 500
          [Root].MinimumNConc.Value = 0.01
          [Root].RootProportion.Value = 0.1
          [Stover].CoverFunction.Expanding.SigCoverFunction.Xo.Value = 690
          [Stover].CoverFunction.Expanding.SigCoverFunction.Ymax.Value = 0.96
          [Stover].CoverFunction.Expanding.SigCoverFunction.b.Value = 120
          [Stover].NConc.Value = 0.02
          [Stover].XoBiomass.Value = 1350.0
          [Stover].bBiomass.Value = 270.0
      Cultivar Triticalie_Autumn: same as Replacements.SCRUM.RyeCorn_Autumn
      Cultivar Triticalie_Spring: same as Replacements.SCRUM.Barley_SpringForage
      Cultivar Wheat_Autumn
        Command:
          [Nodule].NFixationOption = None
          [Phenology].CanopyExpanding.Target.Value = 1461.0
          [Phenology].Senescing.Target.Value = 600
          [Phenology].YieldIncreasing.Target.Value = 939.0
          [Product].DryMatterContent.Value = 0.87
          [Product].ExpectedYield.Value = 1100
          [Product].HarvestIndex.Value = 0.41
          [Product].MaximumNConc.Value = 0.013
          [Product].MinimumNConc.Value = 0.0091
          [Root].KLModifier.XYPairs.Y = 1,1,1,1,1,1,1,0.905,0.819,0.741,0.67,0.607,0.549,0.497,0.449,0.407,0.368,0.333,0.301,0.273,0.247,0.223,0.202,0.183,0.165,0.15,0.135,0.122,0.111,0.1
          [Root].MaximumNConc.Value = 0.009
          [Root].MaximumRootDepth.Value = 1500
          [Root].MinimumNConc.Value = 0.009
          [Root].RootProportion.Value = 0.1
          [Stover].CoverFunction.Expanding.SigCoverFunction.Xo.Value = 540
          [Stover].CoverFunction.Expanding.SigCoverFunction.Ymax.Value = 0.96
          [Stover].CoverFunction.Expanding.SigCoverFunction.b.Value = 120
          [Stover].NConc.Value = 0.005
          [Stover].XoBiomass.Value = 1500.0
          [Stover].bBiomass.Value = 300.0
      Cultivar Wheat_Spring
        Command:
          [Nodule].NFixationOption = None
          [Phenology].CanopyExpanding.Target.Value = 848.0
          [Phenology].Senescing.Target.Value = 300
          [Phenology].YieldIncreasing.Target.Value = 652.0
          [Product].DryMatterContent.Value = 0.87
          [Product].ExpectedYield.Value = 800
          [Product].HarvestIndex.Value = 0.46
          [Product].MaximumNConc.Value = 0.013
          [Product].MinimumNConc.Value = 0.0091
          [Root].KLModifier.XYPairs.Y = 1,1,1,1,1,1,1,0.819,0.67,0.549,0.449,0.368,0.301,0.247,0.202,0.165,0.135,0.111,0.091,0.074,0,0,0,0,0,0,0,0,0,0
          [Root].MaximumNConc.Value = 0.009
          [Root].MaximumRootDepth.Value = 1000
          [Root].MinimumNConc.Value = 0.009
          [Root].RootProportion.Value = 0.1
          [Stover].CoverFunction.Expanding.SigCoverFunction.Xo.Value = 540
          [Stover].CoverFunction.Expanding.SigCoverFunction.Ymax.Value = 0.96
          [Stover].CoverFunction.Expanding.SigCoverFunction.b.Value = 120
          [Stover].NConc.Value = 0.005
          [Stover].XoBiomass.Value = 900.0
          [Stover].bBiomass.Value = 180.0
  DataStore
    Input: FileName=EucalyptusValidationData.txt
  Folder CoffsHarbour
    Simulation CoffsHarbour: Area=0; Slope=0
      Weather: FileName=coffs.met
      Clock: StartDate=1953-04-01; EndDate=1983-12-31
      Summary
      SoilArbitrator Soil Arbitrator
      Zone Plantation: Area=0; Slope=0
        Soil: Latitude=0; Longitude=0
          InitialWater Initial water: PercentMethod=EvenlyDistributed; FractionFull=0.8
          Water
            Thickness  BD    AirDry  LL15  DUL   SAT
            100        1.5   0.01    0.05  0.16  0.29
            300        1.6   0.01    0.05  0.15  0.29
            600        1.68  0.01    0.05  0.14  0.29
            1000       1.75  0.02    0.05  0.13  0.29
            1000       1.7   0.05    0.05  0.12  0.29
            1000       1.7   0.05    0.05  0.12  0.29
            1000       1.7   0.05    0.05  0.12  0.29
            1000       1.7   0.05    0.05  0.12  0.29
            SoilCrop EucalyptusSoil: LL=[0.05, 0.05, 0.05, 0.05, 0.05, 0.05, 0.05, 0.05]; KL=[0.07, 0.07, 0.05, 0.02, 0.02, 0.02, 0.01, 0.01]; XF=[1, 1, 1, 1, 1, 1, 1, 1]
          SoilWater: residueinterception=0; SummerDate=1-Nov; SummerU=4; SummerCona=3.5; WinterDate=1-Apr; WinterU=4; WinterCona=3.5; DiffusConst=88; DiffusSlope=35.4; Salb=0.13; CN2Bare=65; CNRed=20; CNCov=0.8; slope=0; discharge_width=0; catchment_area=0; max_pond=0
            Thickness  SWCON  KLAT
            100        0.9    0
            300        0.9    0
            600        0.9    0
            1000       0.6    0
            1000       0.6    0
            1000       0.6    0
            1000       0.6    0
            1000       0.6    0
          SoilNitrogen: fom_type=[default, manure, mucuna, lablab, shemp, stable]; fract_carb=[0.2, 0.3, 0.54, 0.57, 0.45, 0]; fract_cell=[0.7, 0.3, 0.37, 0.37, 0.47, 0.1]; fract_lign=[0.1, 0.4, 0.09, 0.06, 0.08, 0.9]; wfpsN2N2O_x=[22, 88]; wfpsN2N2O_y=[0.1, 1]
            oc=[1.7497, 0.750393, 0.467366, 0.155278, 0.117402, 0.102465, 0.102459, 0.102464]
          SoilOrganicMatter: RootCN=60; RootWt=1; SoilCN=14.5; EnrACoeff=7.4; EnrBCoeff=0.2; OCUnits=Total
            Thickness  OC    FBiom  FInert
            100        2     0.02   0.5
            300        1     0.02   0.5
            600        0.5   0.01   0.85
            1000       0.2   0.01   0.5
            1000       0.12  0.01   0.9
            1000       0.1   0.01   0.99
            1000       0.1   0.01   0.99
            1000       0.1   0.01   0.99
          Analysis: Thickness=[100, 300, 600, 1000, 1000, 1000, 1000, 1000]; PH=[5.8, 5.7, 5.7, 5.9, 5.7, 5.7, 5.7, 5.7]; PHUnits=Water; BoronUnits=HotWater
          Sample Initial nitrogen: NO3Units=ppm; NH4Units=ppm; SWUnits=Volumetric; OCUnits=Total; PHUnits=Water
            Thickness  NO3   NH4
            100        0.1   0.01
            300        0.1   0.01
            600        0.1   0.01
            1000       0.01  0.01
            1000       0.01  0.01
            1000       0.01  0.01
            1000       0.01  0.01
            1000       0.01  0.01
        Irrigation
        Fertiliser
        SurfaceOrganicMatter: PoolName=Wheat; type=Wheat; mass=2000; standing_fraction=0; cnr=80; CriticalResidueWeight=2000; OptimumDecompTemp=20; MaxCumulativeEOS=20; CNRatioDecompCoeff=0.277; CNRatioDecompThreshold=25; TotalLeachRain=25; MinRainToLeach=10; CriticalMinimumOrganicC=0.004; DefaultCPRatio=0; DefaultStandingFraction=0; StandingExtinctCoeff=0.5; FractionFaecesAdded=0.5
          Pools:
            {PoolName=Wheat, ResidueType=Wheat, Mass=2000, CNRatio=80, StandingFraction=0}
          ResidueTypes: LoadFromResource=ResidueTypes
          TillageTypes
        MicroClimate: a_interception=0; b_interception=1; c_interception=0; d_interception=0; soil_albedo=0.13; air_pressure=1010; soil_emissivity=0.96; sun_angle=15; soil_heat_flux_fraction=0.4; night_interception_fraction=0.5; windspeed_default=3; refheight=2; albedo=0.293662; emissivity=0.96; gsmax=0.01; r50=200
        Plant Eucalyptus: CropType=Eucalyptus
        Manager TreeSowingRule
          RowSpace = 3
          RowWidth = 3
          CultivarName = EGrandis
          SowingDate = 1953-04-01
```csharp
        using System;
        using Models.Core;
        using Models.PMF;
        namespace Models
        {
           [Serializable] 
           [System.Xml.Serialization.XmlInclude(typeof(Model))]
            public class Script : Model
            {      
               [Link] Plant Plant;
               [Link] Clock Clock;

               [Description("Spacing (m) between plants within rows")]
               public double RowSpace { get; set; }
               [Description("Spacing (m) between rows")]
               public double RowWidth { get; set; }

               [Description("Cultivar")]
               public string CultivarName { get; set; }
               [Description("Sowing Date")]
               public DateTime SowingDate { get; set; }

               [EventSubscribe("DoManagement")]
               private void OnDoManagement(object sender, EventArgs e)
               {
				double PlantPopulation = 1/(RowWidth*RowSpace);

				if (Clock.Today.Date == SowingDate)
                    Plant.Sow(population:PlantPopulation, 
                              cultivar:CultivarName, 
                              depth:100, 
                              rowSpacing:150);
                //Plant.Sow(... Contains the following arguements:
                //Population  double  Required  Seeds sowing/m2
                //Cultivar    string  Required  "NameOfCultivar"
                //Depth       double  Optional  Depth (mm) seed sown.   Default is 100mm 
                //MaxCover    double  Optional  Proportion (0-1) of the ground row crop will cover.   Default is 1.0
                //BudNumber   double  Optional  Number of mainstems per seed sown.  Default is 1.0
                //RowSpacing  double  Optional  Spaceing (mm) between drill rows when crop is sown.  Default is 150mm
                //CropClass   string  Optional  Crop class to instantiate when crop is sown.  Default is "Plant"
			   }
            }
        }
```
        Report: EventNames=[Clock].DoReport
          VariableNames:
            [Clock].Today
            Eucalyptus.Phenology.CurrentPhaseName
            Eucalyptus.Phenology.StageCode.Value
            Eucalyptus.Root.NSupplyUptake
            [Soil].SoilWater.Eo
            [Soil].SoilWater.Es
            [Soil].SoilWater.Drainage
            [Soil].SoilWater.Runoff
            [Soil].SoilWater.pond
            Eucalyptus.AboveGround.Wt
            Eucalyptus.BelowGround.Wt
            Eucalyptus.Total.Wt
            Eucalyptus.Leaf.Dead.Wt
            Eucalyptus.Leaf.Live.Wt
            Eucalyptus.Stem.Dead.Wt
            Eucalyptus.Stem.Live.Wt
            Eucalyptus.Root.Dead.Wt
            Eucalyptus.Root.Live.Wt
            Eucalyptus.AboveGround.N
            Eucalyptus.BelowGround.N
            Eucalyptus.Total.N
            Eucalyptus.TotalLive.N
            Eucalyptus.TotalDead.N
            Eucalyptus.Leaf.Dead.N
            Eucalyptus.Leaf.Live.N
            Eucalyptus.Stem.Dead.N
            Eucalyptus.Stem.Live.N
            Eucalyptus.Root.Live.N
            Eucalyptus.Root.Dead.N
            Eucalyptus.Leaf.Live.NConc
            Eucalyptus.Leaf.Dead.NConc
            Eucalyptus.Stem.Live.NConc
            Eucalyptus.Root.Live.NConc
            Eucalyptus.Root.WaterSupply
            Eucalyptus.Root.WaterUptake
            Eucalyptus.Leaf.Transpiration
            Eucalyptus.Leaf.WaterDemand
            Eucalyptus.Root.Depth
            Eucalyptus.Leaf.CoverGreen
            Eucalyptus.Leaf.CoverTotal
            Eucalyptus.Leaf.CoverDead
            Eucalyptus.Leaf.LAI
            Eucalyptus.Leaf.LAIDead
            Eucalyptus.Leaf.Fn
            Eucalyptus.Leaf.Fw
            Eucalyptus.Leaf.Photosynthesis.FT.Value
            Eucalyptus.Leaf.Photosynthesis.FVPD.Value
            Eucalyptus.Stem.MinimumNConc.Value
            Eucalyptus.Root.MinimumNConc.Value
            Eucalyptus.Stem.MaximumNConc.Value
            Eucalyptus.Root.MaximumNConc.Value
            Eucalyptus.TotalLive.Wt
            Eucalyptus.Stem.Live.StructuralWt
            Eucalyptus.Stem.Live.NonStructuralWt
            Eucalyptus.Leaf.SpecificArea
            Eucalyptus.TotalDead.Wt
            [Soil].SoilWater.SWmm
            [Soil].NO3N
            Eucalyptus.Arbitrator.NDemand
            Eucalyptus.Leaf.LAIFunction.SpecificLeafArea.Value
            Eucalyptus.IndividualTreeLiveWt.Value
            Eucalyptus.Age.Value
            Eucalyptus.Leaf.Photosynthesis.Value
            Eucalyptus.Arbitrator.NSupply
      Input: ErrorMessage=Please select a file to use.
  Folder Gympie
    Simulation GympieIF: Area=0; Slope=0
      Weather: FileName=toolara8797.met
      Clock: StartDate=1987-02-04; EndDate=1997-02-04
      Summary
      SoilArbitrator Soil Arbitrator
      Zone Plantation: Area=0; Slope=0
        Soil: Latitude=0; Longitude=0
          InitialWater Initial water: PercentMethod=EvenlyDistributed; FractionFull=0.8
          Water
            Thickness  BD    AirDry  LL15  DUL   SAT
            100        1.5   0.01    0.05  0.16  0.29
            300        1.6   0.01    0.05  0.15  0.29
            600        1.68  0.01    0.05  0.14  0.29
            1000       1.75  0.02    0.05  0.13  0.29
            1000       1.7   0.05    0.05  0.12  0.29
            1000       1.7   0.05    0.05  0.12  0.29
            1000       1.7   0.05    0.05  0.12  0.29
            1000       1.7   0.05    0.05  0.12  0.29
            SoilCrop EucalyptusSoil: LL=[0.05, 0.05, 0.05, 0.05, 0.05, 0.05, 0.05, 0.05]; KL=[0.07, 0.07, 0.05, 0.02, 0.02, 0.02, 0.01, 0.01]; XF=[1, 1, 1, 1, 0, 0, 0, 0]
          SoilWater: same as CoffsHarbour.CoffsHarbour.Plantation.Soil.SoilWater
          SoilNitrogen: same as CoffsHarbour.CoffsHarbour.Plantation.Soil.SoilNitrogen
          SoilOrganicMatter: same as CoffsHarbour.CoffsHarbour.Plantation.Soil.SoilOrganicMatter
          Analysis: Thickness=[100, 300, 600, 1000, 1000, 1000, 1000, 1000]; PH=[5.8, 5.7, 5.7, 5.9, 5.7, 5.7, 5.7, 5.7]; PHUnits=Water; BoronUnits=HotWater
          Sample Initial nitrogen: NO3Units=ppm; NH4Units=ppm; SWUnits=Volumetric; OCUnits=Total; PHUnits=Water
            Thickness  NO3   NH4
            100        0.1   0.01
            300        0.1   0.01
            600        0.1   0.01
            1000       0.01  0.01
            1000       0.01  0.01
            1000       0.01  0.01
            1000       0.01  0.01
            1000       0.01  0.01
        Irrigation
        Fertiliser
        SurfaceOrganicMatter: same as CoffsHarbour.CoffsHarbour.Plantation.SurfaceOrganicMatter
        MicroClimate: same as CoffsHarbour.CoffsHarbour.Plantation.MicroClimate
        Plant Eucalyptus: CropType=Eucalyptus
        Manager TreeSowingRule
          RowSpace = 3
          RowWidth = 3
          CultivarName = EGrandis
          SowingDate = 1987-02-04
          script: same as in CoffsHarbour.CoffsHarbour.Plantation.TreeSowingRule
        Operations FertiliserOperations
          1987-02-09  [Fertiliser].Apply(192, Fertiliser.Types.UreaN, 0);
          1987-05-20  [Fertiliser].Apply(192, Fertiliser.Types.UreaN, 0);
          1987-08-28  [Fertiliser].Apply(96, Fertiliser.Types.UreaN, 0);
          1987-12-06  [Fertiliser].Apply(256, Fertiliser.Types.UreaN, 0);
          1988-02-29  [Fertiliser].Apply(256, Fertiliser.Types.UreaN, 0);
          1988-07-18  [Fertiliser].Apply(128, Fertiliser.Types.UreaN, 0);
          1988-10-26  [Fertiliser].Apply(192, Fertiliser.Types.UreaN, 0);
          1989-06-09  [Fertiliser].Apply(128, Fertiliser.Types.UreaN, 0);
          1989-10-27  [Fertiliser].Apply(96, Fertiliser.Types.UreaN, 0);
        Operations IrrigationOperations
          1987-02-08  [Irrigation].Apply(amount: 2.2533);
          1987-02-15  [Irrigation].Apply(amount: 2.2533);
          1987-02-22  [Irrigation].Apply(amount: 2.2533);
          1987-03-01  [Irrigation].Apply(amount: 2.2533);
          1987-03-08  [Irrigation].Apply(amount: 25.5633);
          1987-03-15  [Irrigation].Apply(amount: 25.5633);
          1987-03-22  [Irrigation].Apply(amount: 25.5633);
          1987-03-29  [Irrigation].Apply(amount: 25.5633);
          1987-04-08  [Irrigation].Apply(amount: 21.5229);
          1987-04-15  [Irrigation].Apply(amount: 21.5229);
          1987-04-22  [Irrigation].Apply(amount: 21.5229);
          1987-04-29  [Irrigation].Apply(amount: 21.5229);
          1987-05-08  [Irrigation].Apply(amount: 13.6752);
          1987-05-15  [Irrigation].Apply(amount: 13.6752);
          1987-05-22  [Irrigation].Apply(amount: 13.6752);
          1987-05-29  [Irrigation].Apply(amount: 13.6752);
          1987-06-08  [Irrigation].Apply(amount: 0);
          1987-06-15  [Irrigation].Apply(amount: 0);
          1987-06-22  [Irrigation].Apply(amount: 0);
          1987-06-29  [Irrigation].Apply(amount: 0);
          1987-07-08  [Irrigation].Apply(amount: 17.6379);
          1987-07-15  [Irrigation].Apply(amount: 17.6379);
          1987-07-22  [Irrigation].Apply(amount: 17.6379);
          1987-07-29  [Irrigation].Apply(amount: 17.6379);
          1987-08-08  [Irrigation].Apply(amount: 7.77);
          1987-08-15  [Irrigation].Apply(amount: 7.77);
          1987-08-22  [Irrigation].Apply(amount: 7.77);
          1987-08-29  [Irrigation].Apply(amount: 7.77);
          1987-09-08  [Irrigation].Apply(amount: 16.58895);
          1987-09-15  [Irrigation].Apply(amount: 16.58895);
          1987-09-22  [Irrigation].Apply(amount: 16.58895);
          1987-09-29  [Irrigation].Apply(amount: 16.58895);
          1987-10-08  [Irrigation].Apply(amount: 15.8508);
          1987-10-15  [Irrigation].Apply(amount: 15.8508);
          1987-10-22  [Irrigation].Apply(amount: 15.8508);
          1987-10-29  [Irrigation].Apply(amount: 15.8508);
          1987-11-08  [Irrigation].Apply(amount: 20.47395);
          1987-11-15  [Irrigation].Apply(amount: 20.47395);
          1987-11-22  [Irrigation].Apply(amount: 20.47395);
          1987-11-29  [Irrigation].Apply(amount: 20.47395);
          1987-12-08  [Irrigation].Apply(amount: 19.425);
          1987-12-15  [Irrigation].Apply(amount: 19.425);
          1987-12-22  [Irrigation].Apply(amount: 19.425);
          1987-12-29  [Irrigation].Apply(amount: 19.425);
          1988-01-08  [Irrigation].Apply(amount: 15.6954);
          1988-01-15  [Irrigation].Apply(amount: 15.6954);
          1988-01-22  [Irrigation].Apply(amount: 15.6954);
          1988-01-29  [Irrigation].Apply(amount: 15.6954);
          1988-02-08  [Irrigation].Apply(amount: 39.0054);
          1988-02-15  [Irrigation].Apply(amount: 39.0054);
          1988-02-22  [Irrigation].Apply(amount: 39.0054);
          1988-02-29  [Irrigation].Apply(amount: 39.0054);
          1988-03-08  [Irrigation].Apply(amount: 42.56018);
          1988-03-15  [Irrigation].Apply(amount: 42.56018);
          1988-03-22  [Irrigation].Apply(amount: 42.56018);
          1988-03-29  [Irrigation].Apply(amount: 42.56018);
          1988-04-08  [Irrigation].Apply(amount: 0);
          1988-04-15  [Irrigation].Apply(amount: 0);
          1988-04-22  [Irrigation].Apply(amount: 0);
          1988-04-29  [Irrigation].Apply(amount: 0);
          1988-05-08  [Irrigation].Apply(amount: 0);
          1988-05-15  [Irrigation].Apply(amount: 0);
          1988-05-22  [Irrigation].Apply(amount: 0);
          1988-05-29  [Irrigation].Apply(amount: 0);
          1988-06-08  [Irrigation].Apply(amount: 0);
          1988-06-15  [Irrigation].Apply(amount: 0);
          1988-06-22  [Irrigation].Apply(amount: 0);
          1988-06-29  [Irrigation].Apply(amount: 0);
          1988-07-08  [Irrigation].Apply(amount: 0);
          1988-07-15  [Irrigation].Apply(amount: 0);
          1988-07-22  [Irrigation].Apply(amount: 0);
          1988-07-29  [Irrigation].Apply(amount: 0);
          1988-08-08  [Irrigation].Apply(amount: 7.77);
          1988-08-15  [Irrigation].Apply(amount: 7.77);
          1988-08-22  [Irrigation].Apply(amount: 7.77);
          1988-08-29  [Irrigation].Apply(amount: 7.77);
          1988-09-08  [Irrigation].Apply(amount: 9.965025);
          1988-09-15  [Irrigation].Apply(amount: 9.965025);
          1988-09-22  [Irrigation].Apply(amount: 9.965025);
          1988-09-29  [Irrigation].Apply(amount: 9.965025);
          1988-10-08  [Irrigation].Apply(amount: 40.404);
          1988-10-15  [Irrigation].Apply(amount: 40.404);
          1988-10-22  [Irrigation].Apply(amount: 40.404);
          1988-10-29  [Irrigation].Apply(amount: 40.404);
          1988-11-08  [Irrigation].Apply(amount: 49.55318);
          1988-11-15  [Irrigation].Apply(amount: 49.55318);
          1988-11-22  [Irrigation].Apply(amount: 49.55318);
          1988-11-29  [Irrigation].Apply(amount: 49.55318);
          1988-12-08  [Irrigation].Apply(amount: 12.91763);
          1988-12-15  [Irrigation].Apply(amount: 12.91763);
          1988-12-22  [Irrigation].Apply(amount: 12.91763);
          1988-12-29  [Irrigation].Apply(amount: 12.91763);
          1989-01-08  [Irrigation].Apply(amount: 11.8881);
          1989-01-15  [Irrigation].Apply(amount: 11.8881);
          1989-01-22  [Irrigation].Apply(amount: 11.8881);
          1989-01-29  [Irrigation].Apply(amount: 11.8881);
          1989-02-08  [Irrigation].Apply(amount: 15.9285);
          1989-02-15  [Irrigation].Apply(amount: 15.9285);
          1989-02-22  [Irrigation].Apply(amount: 15.9285);
          1989-03-01  [Irrigation].Apply(amount: 15.9285);
          1989-03-08  [Irrigation].Apply(amount: 23.7762);
          1989-03-15  [Irrigation].Apply(amount: 23.7762);
          1989-03-22  [Irrigation].Apply(amount: 23.7762);
          1989-03-29  [Irrigation].Apply(amount: 23.7762);
          1989-04-08  [Irrigation].Apply(amount: 0);
          1989-04-15  [Irrigation].Apply(amount: 0);
          1989-04-22  [Irrigation].Apply(amount: 0);
          1989-04-29  [Irrigation].Apply(amount: 0);
          1989-05-08  [Irrigation].Apply(amount: 0);
          1989-05-15  [Irrigation].Apply(amount: 0);
          1989-05-22  [Irrigation].Apply(amount: 0);
          1989-05-29  [Irrigation].Apply(amount: 0);
          1989-06-08  [Irrigation].Apply(amount: 0);
          1989-06-15  [Irrigation].Apply(amount: 0);
          1989-06-22  [Irrigation].Apply(amount: 0);
          1989-06-29  [Irrigation].Apply(amount: 0);
          1989-07-08  [Irrigation].Apply(amount: 0.2331);
          1989-07-15  [Irrigation].Apply(amount: 0.2331);
          1989-07-22  [Irrigation].Apply(amount: 0.2331);
          1989-07-29  [Irrigation].Apply(amount: 0.2331);
          1989-08-08  [Irrigation].Apply(amount: 12.91763);
          1989-08-15  [Irrigation].Apply(amount: 12.91763);
          1989-08-22  [Irrigation].Apply(amount: 12.91763);
          1989-08-29  [Irrigation].Apply(amount: 12.91763);
          1989-09-08  [Irrigation].Apply(amount: 51.70935);
          1989-09-15  [Irrigation].Apply(amount: 51.70935);
          1989-09-22  [Irrigation].Apply(amount: 51.70935);
          1989-09-29  [Irrigation].Apply(amount: 51.70935);
          1989-10-08  [Irrigation].Apply(amount: 61.4607);
          1989-10-15  [Irrigation].Apply(amount: 61.4607);
          1989-10-22  [Irrigation].Apply(amount: 61.4607);
          1989-10-29  [Irrigation].Apply(amount: 61.4607);
          1989-11-08  [Irrigation].Apply(amount: 31.21598);
          1989-11-15  [Irrigation].Apply(amount: 31.21598);
          1989-11-22  [Irrigation].Apply(amount: 31.21598);
          1989-11-29  [Irrigation].Apply(amount: 31.21598);
          1989-12-08  [Irrigation].Apply(amount: 13.73348);
          1989-12-15  [Irrigation].Apply(amount: 13.73348);
          1989-12-22  [Irrigation].Apply(amount: 13.73348);
          1989-12-29  [Irrigation].Apply(amount: 13.73348);
          1990-01-08  [Irrigation].Apply(amount: 69.50265);
          1990-01-15  [Irrigation].Apply(amount: 69.50265);
          1990-01-22  [Irrigation].Apply(amount: 69.50265);
          1990-01-29  [Irrigation].Apply(amount: 69.50265);
          1990-02-08  [Irrigation].Apply(amount: 77.19495);
          1990-02-15  [Irrigation].Apply(amount: 77.19495);
          1990-02-22  [Irrigation].Apply(amount: 77.19495);
          1990-03-01  [Irrigation].Apply(amount: 77.19495);
          1990-03-08  [Irrigation].Apply(amount: 30.6915);
          1990-03-15  [Irrigation].Apply(amount: 30.6915);
          1990-03-22  [Irrigation].Apply(amount: 30.6915);
          1990-03-29  [Irrigation].Apply(amount: 30.6915);
          1990-04-08  [Irrigation].Apply(amount: 0);
          1990-04-15  [Irrigation].Apply(amount: 0);
          1990-04-22  [Irrigation].Apply(amount: 0);
          1990-04-29  [Irrigation].Apply(amount: 0);
          1990-05-08  [Irrigation].Apply(amount: 0);
          1990-05-15  [Irrigation].Apply(amount: 0);
          1990-05-22  [Irrigation].Apply(amount: 0);
          1990-05-29  [Irrigation].Apply(amount: 0);
          1990-06-08  [Irrigation].Apply(amount: 0);
          1990-06-15  [Irrigation].Apply(amount: 0);
          1990-06-22  [Irrigation].Apply(amount: 0);
          1990-06-29  [Irrigation].Apply(amount: 0);
          1990-07-08  [Irrigation].Apply(amount: 0);
          1990-07-15  [Irrigation].Apply(amount: 0);
          1990-07-22  [Irrigation].Apply(amount: 0);
          1990-07-29  [Irrigation].Apply(amount: 0);
          1990-08-08  [Irrigation].Apply(amount: 24.82515);
          1990-08-15  [Irrigation].Apply(amount: 24.82515);
          1990-08-22  [Irrigation].Apply(amount: 24.82515);
          1990-08-29  [Irrigation].Apply(amount: 24.82515);
          1990-09-08  [Irrigation].Apply(amount: 59.9844);
          1990-09-15  [Irrigation].Apply(amount: 59.9844);
          1990-09-22  [Irrigation].Apply(amount: 59.9844);
          1990-09-29  [Irrigation].Apply(amount: 59.9844);
          1990-10-08  [Irrigation].Apply(amount: 60.70313);
          1990-10-15  [Irrigation].Apply(amount: 60.70313);
          1990-10-22  [Irrigation].Apply(amount: 60.70313);
          1990-10-29  [Irrigation].Apply(amount: 60.70313);
          1990-11-08  [Irrigation].Apply(amount: 42.22995);
          1990-11-15  [Irrigation].Apply(amount: 42.22995);
          1990-11-22  [Irrigation].Apply(amount: 42.22995);
          1990-11-29  [Irrigation].Apply(amount: 42.22995);
          1990-12-08  [Irrigation].Apply(amount: 61.0722);
          1990-12-15  [Irrigation].Apply(amount: 61.0722);
          1990-12-22  [Irrigation].Apply(amount: 61.0722);
          1990-12-29  [Irrigation].Apply(amount: 61.0722);
          1991-01-08  [Irrigation].Apply(amount: 16.02563);
          1991-01-15  [Irrigation].Apply(amount: 16.02563);
          1991-01-22  [Irrigation].Apply(amount: 16.02563);
          1991-01-29  [Irrigation].Apply(amount: 16.02563);
          1991-02-08  [Irrigation].Apply(amount: 10.29525);
          1991-02-15  [Irrigation].Apply(amount: 10.29525);
          1991-02-22  [Irrigation].Apply(amount: 10.29525);
          1991-03-01  [Irrigation].Apply(amount: 10.29525);
          1991-03-08  [Irrigation].Apply(amount: 23.73735);
          1991-03-15  [Irrigation].Apply(amount: 23.73735);
          1991-03-22  [Irrigation].Apply(amount: 23.73735);
          1991-03-29  [Irrigation].Apply(amount: 23.73735);
          1991-04-08  [Irrigation].Apply(amount: 15.54);
          1991-04-15  [Irrigation].Apply(amount: 15.54);
          1991-04-22  [Irrigation].Apply(amount: 15.54);
          1991-04-29  [Irrigation].Apply(amount: 15.54);
          1991-05-08  [Irrigation].Apply(amount: 15.9285);
          1991-05-15  [Irrigation].Apply(amount: 15.9285);
          1991-05-22  [Irrigation].Apply(amount: 15.9285);
          1991-05-29  [Irrigation].Apply(amount: 15.9285);
          1991-06-08  [Irrigation].Apply(amount: 0);
          1991-06-15  [Irrigation].Apply(amount: 0);
          1991-06-22  [Irrigation].Apply(amount: 0);
          1991-06-29  [Irrigation].Apply(amount: 0);
          1991-07-08  [Irrigation].Apply(amount: 0);
          1991-07-15  [Irrigation].Apply(amount: 0);
          1991-07-22  [Irrigation].Apply(amount: 0);
          1991-07-29  [Irrigation].Apply(amount: 0);
          1991-08-08  [Irrigation].Apply(amount: 16.51125);
          1991-08-15  [Irrigation].Apply(amount: 16.51125);
          1991-08-22  [Irrigation].Apply(amount: 16.51125);
          1991-08-29  [Irrigation].Apply(amount: 16.51125);
          1991-09-08  [Irrigation].Apply(amount: 61.63553);
          1991-09-15  [Irrigation].Apply(amount: 61.63553);
          1991-09-22  [Irrigation].Apply(amount: 61.63553);
          1991-09-29  [Irrigation].Apply(amount: 61.63553);
          1991-10-08  [Irrigation].Apply(amount: 31.7016);
          1991-10-15  [Irrigation].Apply(amount: 31.7016);
          1991-10-22  [Irrigation].Apply(amount: 31.7016);
          1991-10-29  [Irrigation].Apply(amount: 31.7016);
          1991-11-08  [Irrigation].Apply(amount: 29.04038);
          1991-11-15  [Irrigation].Apply(amount: 29.04038);
          1991-11-22  [Irrigation].Apply(amount: 29.04038);
          1991-11-29  [Irrigation].Apply(amount: 29.04038);
          1991-12-08  [Irrigation].Apply(amount: 31.08);
          1991-12-15  [Irrigation].Apply(amount: 31.08);
          1991-12-22  [Irrigation].Apply(amount: 31.08);
          1991-12-29  [Irrigation].Apply(amount: 31.08);
          1992-01-08  [Irrigation].Apply(amount: 46.7754);
          1992-01-15  [Irrigation].Apply(amount: 46.7754);
          1992-01-22  [Irrigation].Apply(amount: 46.7754);
          1992-01-29  [Irrigation].Apply(amount: 46.7754);
          1992-02-08  [Irrigation].Apply(amount: 7.7);
          1992-02-15  [Irrigation].Apply(amount: 7.7);
          1992-02-22  [Irrigation].Apply(amount: 7.7);
          1992-02-29  [Irrigation].Apply(amount: 7.7);
          1992-03-08  [Irrigation].Apply(amount: 0);
          1992-03-15  [Irrigation].Apply(amount: 0);
          1992-03-22  [Irrigation].Apply(amount: 0);
          1992-03-29  [Irrigation].Apply(amount: 0);
          1992-04-08  [Irrigation].Apply(amount: 0);
          1992-04-15  [Irrigation].Apply(amount: 0);
          1992-04-22  [Irrigation].Apply(amount: 0);
          1992-04-29  [Irrigation].Apply(amount: 0);
          1992-05-08  [Irrigation].Apply(amount: 0);
          1992-05-15  [Irrigation].Apply(amount: 0);
          1992-05-22  [Irrigation].Apply(amount: 0);
          1992-05-29  [Irrigation].Apply(amount: 0);
          1992-06-08  [Irrigation].Apply(amount: 0);
          1992-06-15  [Irrigation].Apply(amount: 0);
          1992-06-22  [Irrigation].Apply(amount: 0);
          1992-06-29  [Irrigation].Apply(amount: 0);
          1992-07-08  [Irrigation].Apply(amount: 6.41);
          1992-07-15  [Irrigation].Apply(amount: 6.41);
          1992-07-22  [Irrigation].Apply(amount: 6.41);
          1992-07-29  [Irrigation].Apply(amount: 6.41);
          1992-08-08  [Irrigation].Apply(amount: 34.965);
          1992-08-15  [Irrigation].Apply(amount: 34.965);
          1992-08-22  [Irrigation].Apply(amount: 34.965);
          1992-08-29  [Irrigation].Apply(amount: 34.965);
          1992-09-08  [Irrigation].Apply(amount: 3.885);
          1992-09-15  [Irrigation].Apply(amount: 3.885);
          1992-09-22  [Irrigation].Apply(amount: 3.885);
          1992-09-29  [Irrigation].Apply(amount: 3.885);
          1992-10-08  [Irrigation].Apply(amount: 41.35583);
          1992-10-15  [Irrigation].Apply(amount: 41.35583);
          1992-10-22  [Irrigation].Apply(amount: 41.35583);
          1992-10-29  [Irrigation].Apply(amount: 41.35583);
          1992-11-08  [Irrigation].Apply(amount: 3.69075);
          1992-11-15  [Irrigation].Apply(amount: 3.69075);
          1992-11-22  [Irrigation].Apply(amount: 3.69075);
          1992-11-29  [Irrigation].Apply(amount: 3.69075);
          1992-12-08  [Irrigation].Apply(amount: 0);
          1992-12-15  [Irrigation].Apply(amount: 0);
          1992-12-22  [Irrigation].Apply(amount: 0);
          1992-12-29  [Irrigation].Apply(amount: 0);
          1993-01-08  [Irrigation].Apply(amount: 11.79098);
          1993-01-15  [Irrigation].Apply(amount: 11.79098);
          1993-01-22  [Irrigation].Apply(amount: 11.79098);
          1993-01-29  [Irrigation].Apply(amount: 11.79098);
          1993-02-08  [Irrigation].Apply(amount: 26.37915);
          1993-02-15  [Irrigation].Apply(amount: 26.37915);
          1993-02-22  [Irrigation].Apply(amount: 26.37915);
          1993-03-01  [Irrigation].Apply(amount: 26.37915);
          1993-03-08  [Irrigation].Apply(amount: 9.51825);
          1993-03-15  [Irrigation].Apply(amount: 9.51825);
          1993-03-22  [Irrigation].Apply(amount: 9.51825);
          1993-03-29  [Irrigation].Apply(amount: 9.51825);
          1993-04-08  [Irrigation].Apply(amount: 47.64953);
          1993-04-15  [Irrigation].Apply(amount: 47.64953);
          1993-04-22  [Irrigation].Apply(amount: 47.64953);
          1993-04-29  [Irrigation].Apply(amount: 47.64953);
          1993-05-08  [Irrigation].Apply(amount: 0);
          1993-05-15  [Irrigation].Apply(amount: 0);
          1993-05-22  [Irrigation].Apply(amount: 0);
          1993-05-29  [Irrigation].Apply(amount: 0);
          1993-06-08  [Irrigation].Apply(amount: 20.70705);
          1993-06-15  [Irrigation].Apply(amount: 20.70705);
          1993-06-22  [Irrigation].Apply(amount: 20.70705);
          1993-06-29  [Irrigation].Apply(amount: 20.70705);
          1993-07-08  [Irrigation].Apply(amount: 17.19113);
          1993-07-15  [Irrigation].Apply(amount: 17.19113);
          1993-07-22  [Irrigation].Apply(amount: 17.19113);
          1993-07-29  [Irrigation].Apply(amount: 17.19113);
          1993-08-08  [Irrigation].Apply(amount: 30.56625);
          1993-08-15  [Irrigation].Apply(amount: 30.56625);
          1993-08-22  [Irrigation].Apply(amount: 30.56625);
          1993-08-29  [Irrigation].Apply(amount: 30.56625);
          1993-09-08  [Irrigation].Apply(amount: 7.724925);
          1993-09-15  [Irrigation].Apply(amount: 7.724925);
          1993-09-22  [Irrigation].Apply(amount: 7.724925);
          1993-09-29  [Irrigation].Apply(amount: 7.724925);
          1993-10-08  [Irrigation].Apply(amount: 30.381);
          1993-10-15  [Irrigation].Apply(amount: 30.381);
          1993-10-22  [Irrigation].Apply(amount: 30.381);
          1993-10-29  [Irrigation].Apply(amount: 30.381);
          1993-11-08  [Irrigation].Apply(amount: 0);
          1993-11-15  [Irrigation].Apply(amount: 0);
          1993-11-22  [Irrigation].Apply(amount: 0);
          1993-11-29  [Irrigation].Apply(amount: 0);
          1993-12-08  [Irrigation].Apply(amount: 10.50368);
          1993-12-15  [Irrigation].Apply(amount: 10.50368);
          1993-12-22  [Irrigation].Apply(amount: 10.50368);
          1993-12-29  [Irrigation].Apply(amount: 10.50368);
          1994-01-08  [Irrigation].Apply(amount: 15.38898);
          1994-01-15  [Irrigation].Apply(amount: 15.38898);
          1994-01-22  [Irrigation].Apply(amount: 15.38898);
          1994-01-29  [Irrigation].Apply(amount: 15.38898);
          1994-02-08  [Irrigation].Apply(amount: 0);
          1994-02-15  [Irrigation].Apply(amount: 0);
          1994-02-22  [Irrigation].Apply(amount: 0);
          1994-03-01  [Irrigation].Apply(amount: 0);
          1994-03-08  [Irrigation].Apply(amount: 7.7805);
          1994-03-15  [Irrigation].Apply(amount: 7.7805);
          1994-03-22  [Irrigation].Apply(amount: 7.7805);
          1994-03-29  [Irrigation].Apply(amount: 7.7805);
        Report: EventNames=[Clock].DoReport
          VariableNames:
            [Clock].Today
            Eucalyptus.Phenology.CurrentPhaseName
            Eucalyptus.Phenology.StageCode.Value
            Eucalyptus.Root.NSupplyUptake
            [Soil].SoilWater.Eo
            [Soil].SoilWater.Es
            [Soil].SoilWater.Drainage
            [Soil].SoilWater.Runoff
            [Soil].SoilWater.pond
            Eucalyptus.AboveGround.Wt
            Eucalyptus.BelowGround.Wt
            Eucalyptus.Total.Wt
            Eucalyptus.Leaf.Dead.Wt
            Eucalyptus.Leaf.Live.Wt
            Eucalyptus.Stem.Dead.Wt
            Eucalyptus.Stem.Live.Wt
            Eucalyptus.Root.Dead.Wt
            Eucalyptus.Root.Live.Wt
            Eucalyptus.AboveGround.N
            Eucalyptus.BelowGround.N
            Eucalyptus.Total.N
            Eucalyptus.TotalLive.N
            Eucalyptus.TotalDead.N
            Eucalyptus.Leaf.Dead.N
            Eucalyptus.Leaf.Live.N
            Eucalyptus.Stem.Dead.N
            Eucalyptus.Stem.Live.N
            Eucalyptus.Root.Live.N
            Eucalyptus.Root.Dead.N
            Eucalyptus.Leaf.Live.NConc
            Eucalyptus.Leaf.Dead.NConc
            Eucalyptus.Stem.Live.NConc
            Eucalyptus.Root.Live.NConc
            Eucalyptus.Root.WaterSupply
            Eucalyptus.Root.WaterUptake
            Eucalyptus.Leaf.Transpiration
            Eucalyptus.Leaf.WaterDemand
            Eucalyptus.Root.Depth
            Eucalyptus.Leaf.CoverGreen
            Eucalyptus.Leaf.CoverTotal
            Eucalyptus.Leaf.CoverDead
            Eucalyptus.Leaf.LAI
            Eucalyptus.Leaf.LAIDead
            Eucalyptus.Leaf.Fn
            Eucalyptus.Leaf.Fw
            Eucalyptus.Leaf.Photosynthesis.FT.Value
            Eucalyptus.Leaf.Photosynthesis.FVPD.Value
            Eucalyptus.Stem.MinimumNConc.Value
            Eucalyptus.Root.MinimumNConc.Value
            Eucalyptus.Stem.MaximumNConc.Value
            Eucalyptus.Root.MaximumNConc.Value
            Eucalyptus.TotalLive.Wt
            Eucalyptus.Stem.Live.StructuralWt
            Eucalyptus.Stem.Live.NonStructuralWt
            Eucalyptus.Leaf.SpecificArea
            Eucalyptus.TotalDead.Wt
            [Soil].SoilWater.SWmm
            [Soil].NO3N
            Eucalyptus.Arbitrator.NDemand
            Eucalyptus.Leaf.LAIFunction.SpecificLeafArea.Value
            Eucalyptus.IndividualTreeLiveWt.Value
            Eucalyptus.Age.Value
      Input: ErrorMessage=Please select a file to use.
  Folder Wagga
    Simulation Wagga: Area=0; Slope=0
      Weather: FileName=wwepp.met
      Clock: StartDate=1991-07-01; EndDate=1996-06-30
      Summary
      SoilArbitrator Soil Arbitrator
      Zone Plantation: same as Gympie.GympieIF.Plantation
      Input: ErrorMessage=Please select a file to use.
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