Simulations: Version=14
  Replacements
    Plant Fathen
      OrganArbitrator Arbitrator
        RelativeAllocation NArbitrator
        RelativeAllocation DMArbitrator
      Phenology: DaysAfterSowing=0
        GerminatingPhase Planted: Start=Sowing; End=Germination
        EmergingPhase Germinated: Start=Germination; End=PreEmerge; ShootLag=50; ShootRate=1.5
          VariableReference ThermalTime: VariableName=[Phenology].ThermalTime.Value()
        GenericPhase Emerging: Start=PreEmerge; End=Emerged
          Constant Target: FixedValue=300
          VariableReference ThermalTime: VariableName=[Phenology].ThermalTime.Value()
        GenericPhase Emerged: Start=Emerged; End=Expanding
          Constant Target: FixedValue=150
          VariableReference ThermalTime: VariableName=[Phenology].ThermalTime.Value()
        GenericPhase Expanding: Start=Expanding; End=Vegetative
          Constant Target: FixedValue=150
          VariableReference ThermalTime: VariableName=[Phenology].ThermalTime.Value()
        GenericPhase Vegetative: Start=Vegetative; End=EarlyReproductive
          Constant Target: FixedValue=150
          VariableReference ThermalTime: VariableName=[Phenology].ThermalTime.Value()
        GenericPhase EarlyFlowering: Start=Vegetative; End=EarlyReproductive
          Constant Target: FixedValue=2000
          VariableReference ThermalTime: VariableName=[Phenology].ThermalTime.Value()
        GenericPhase Flowering: Start=EarlyReproductive; End=Reproductive
          Constant Target: FixedValue=3000
          VariableReference ThermalTime: VariableName=[Phenology].ThermalTime.Value()
        EndPhase Maturity: Start=Reproductive; End=Maturity
          Constant Target: FixedValue=15000
          VariableReference ThermalTime: VariableName=[Phenology].ThermalTime.Value()
        AirTemperatureFunction ThermalTime
          XYPairs: X=[0, 18, 36]; Y=[0, 18, 0]
      Structure: Initialised=false; Germinated=false; Emerged=false; CohortToInitialise=0; TipToAppear=0; ApexNum=0
        VariableReference ThermalTime: VariableName=[Phenology].ThermalTime.Value()
        PhaseLookupValue Phyllochron: Start=Emerged; End=Maturity
          Constant: FixedValue=17
        Constant FinalLeafNumber: FixedValue=60
        Constant DroughtInducedBranchMortality: FixedValue=0
        Constant BranchMortality: FixedValue=0
        MultiplyFunction BranchingRate
          LinearInterpolationFunction PotentialBranchingRate: XProperty=[Structure].LeafTipsAppeared
            XYPairs: X=[0, 20]; Y=[0, 1]
          LinearInterpolationFunction CoverResponse: XProperty=[Structure].LeafTipsAppeared
            XYPairs: X=[0, 1]; Y=[1, 1]
        LinearInterpolationFunction HeightModel: XProperty=[Structure].LeafTipsAppeared
          XYPairs: X=[0, 12, 60]; Y=[0, 100, 2000]
        LinearInterpolationFunction PlantMortality: XProperty=[Leaf].CoverGreen
          XYPairs: X=[0.98, 1]; Y=[0, 1]
        Constant StemSenescenceAge: FixedValue=0
      GenericOrgan Stem
        Constant StructuralFraction: FixedValue=0.95
          Constant StructuralFraction: FixedValue=0.95
        Constant MaximumNConc: FixedValue=0.02
        Constant MinimumNConc: FixedValue=0.006
        PhaseBasedSwitch NitrogenDemandSwitch: Start=Germination; End=Maturity
        Constant NReallocationFactor: FixedValue=0.8
        Constant NRetranslocationFactor: FixedValue=0.01
        Constant DMRetranslocationFactor: FixedValue=0.95
        Constant DMReallocationFactor: FixedValue=0.8
        PartitionFractionDemandFunction DMDemandFunction
          PhaseLookup PartitionFractionEh
            PhaseLookupValue Early: Start=Emerged; End=Vegetative
              Constant: FixedValue=0.4
            PhaseLookupValue Vege: Start=Vegetative; End=EarlyReproductive
              Constant: FixedValue=0.6
            PhaseLookupValue EarlyFlowering: Start=EarlyReproductive; End=Reproductive
              Constant: FixedValue=0.2
            PhaseLookupValue Repro: Start=Reproductive; End=Maturity
              Constant: FixedValue=0.1
          Constant PartitionFraction: FixedValue=0.85
        Biomass Live
        Biomass Dead
        BiomassRemoval BiomassRemovalDefaults
          OrganBiomassRemovalType Harvest: FractionLiveToRemove=0.5; FractionDeadToRemove=0; FractionLiveToResidue=0.1; FractionDeadToResidue=0
          OrganBiomassRemovalType Cut: FractionLiveToRemove=0.8; FractionDeadToRemove=0; FractionLiveToResidue=0; FractionDeadToResidue=0
          OrganBiomassRemovalType Prune: FractionLiveToRemove=0; FractionDeadToRemove=0; FractionLiveToResidue=0.6; FractionDeadToResidue=0
          OrganBiomassRemovalType Graze: FractionLiveToRemove=0.6; FractionDeadToRemove=0; FractionLiveToResidue=0.2; FractionDeadToResidue=0
          OrganBiomassRemovalType Thin: FractionLiveToRemove=0; FractionDeadToRemove=0; FractionLiveToResidue=0.05; FractionDeadToResidue=0
        Constant SenescenceRate: FixedValue=0
        Constant DetachmentRateFunction: FixedValue=0; Units=/d
        Constant MaintenanceRespirationFunction: FixedValue=0; Units=0-1
        Constant DMConversionEfficiency: FixedValue=1; Units=0-1
        Constant InitialWtFunction: FixedValue=0.01; Units=g/m^2
        VariableReference CriticalNConc: VariableName=[Stem].MinimumNConc.Value()
      Leaf: MaxCover=1; R50=200; MicroClimatePresent=true; KDead=0.03; MaximumMainStemLeafNumber=80
        zero: GrowthRespiration, MaintenanceRespiration, CurrentExpandingLeaf, StartFractionExpanded, FractionNextleafExpanded, DeadNodesYesterday, Albedo, Gsmax, FRGR, PotentialEP, DMConversionEfficiency, TipsAtEmergence, CohortsAtInitialisation, FractionDied
        LeafCohort InitialLeaves[1]: Rank=1; Area=50
          zero: NReallocationFactor, DMReallocationFactor, NRetranslocationFactor, DMRetranslocationFactor, ShadeInducedSenRate, SenescedFrac, DeltaPotentialArea, DeltaWaterConstrainedArea, DeltaCarbonConstrainedArea, PotentialStructuralDMAllocation, PotentialMetabolicDMAllocation, MetabolicNReallocated, MetabolicWtReallocated, StorageNReallocated, StorageWtReallocated, MetabolicNRetranslocated, StorageNRetrasnlocated, DMRetranslocated, MetabolicNAllocation, StructuralDMAllocation, MetabolicDMAllocation, MaintenanceRespiration
        CompositeBiomass Live: Propertys=[[Leaf].CohortLive]
        CompositeBiomass Dead: Propertys=[[Leaf].CohortDead]
        CompositeBiomass Total: Propertys=[[Leaf].CohortLive, [Leaf].CohortDead]
        ArrayBiomass CohortArrayLive: Propertys=[[Leaf].Live]; ArraySize=[Leaf].MaxNodeNo
        ArrayBiomass CohortArrayDead: Propertys=[[Leaf].Dead]; ArraySize=[Leaf].MaxNodeNo
        VariableReference ThermalTime: VariableName=[Phenology].ThermalTime.Value()
        RUEModel Photosynthesis
          Constant RUE: FixedValue=1.35
          Constant FN: FixedValue=1
          Constant FVPD: FixedValue=1
          RUECO2Function FCO2: PhotosyntheticPathway=C3
          VariableReference RadnInt: VariableName=[Leaf].RadIntTot
          VariableReference RUEact: VariableName=[RUEModel].RueAct
          WeightedTemperatureFunction FT: MaximumTemperatureWeighting=0.75
            XYPairs: X=[0, 18, 26, 45]; Y=[0.1, 1, 1, 0.1]
          LinearInterpolationFunction FW: XProperty=[Leaf].Fw
            XYPairs: X=[0, 0.1]; Y=[0, 1]
        MultiplyFunction ExtinctionCoeff
          Constant PotentialExtinctionCoeff: FixedValue=0.6
          LinearInterpolationFunction WaterStress: XProperty=[Fathen].WaterSupplyDemandRatio
            XYPairs: X=[0, 1]; Y=[0.5, 1]
        LeafCohortParameters CohortParameters
          Constant SenessingLeafRelativeSize: FixedValue=1; Units=0-1
          LinearInterpolationFunction MaxArea: XProperty=[Structure].LeafTipsAppeared
            XYPairs: X=[0, 1, 7, 20, 40, 60]; Y=[500, 16000, 190000, 100000, 1200, 500]
          LinearInterpolationFunction LagDuration: XProperty=[Structure].LeafTipsAppeared
            XYPairs: X=[0, 11, 15, 21, 35, 45]; Y=[100, 300, 300, 300, 200, 100]
          Constant SenescenceDuration: FixedValue=0.0001
          Constant DetachmentLagDuration: FixedValue=1000000
          Constant DetachmentDuration: FixedValue=100000
          Constant StructuralFraction: FixedValue=0.6
          Constant SpecificLeafAreaMin: FixedValue=14000
          Constant SpecificLeafAreaMax: FixedValue=18000
          Constant MinimumNConc: FixedValue=0.01
          Constant CriticalNConc: FixedValue=0.03
          Constant MaximumNConc: FixedValue=0.06
          Constant NReallocationFactor: FixedValue=0.8
          Constant NRetranslocationFactor: FixedValue=0.01
          Constant DMRetranslocationFactor: FixedValue=0.95
          Constant DMReallocationFactor: FixedValue=0.8
          Constant StorageFraction: FixedValue=0.2
            Constant NonStructuralFraction: FixedValue=0.2
          Constant InitialNConc: FixedValue=0.18
          Constant DroughtInducedLagAcceleration: FixedValue=1
          Constant DroughtInducedSenAcceleration: FixedValue=1
          Constant CellDivisionStress: FixedValue=1; Units=0-1
          Constant MaintenanceRespirationFunction: FixedValue=0
          Constant LeafSizeShapeParameter: FixedValue=0.01
          Constant GrowthDuration: FixedValue=240
          Constant ShadeInducedSenescenceRate: FixedValue=0
          LinearInterpolationFunction ExpansionStress: XProperty=[Leaf].Fw
            XYPairs: X=[0.5, 1]; Y=[0, 1]
          ArrayFunction LagDurationAgeMultiplier: Values=0.5 0.75 1
          ArrayFunction SenescenceDurationAgeMultiplier: Values=0.5 0.75 1
          ArrayFunction LeafSizeAgeMultiplier: Values=0.5 0.75 1 1 1 1 1 1 1 1 1 1
        MinimumFunction FRGRFunction
          VariableReference RUE_FT: VariableName=[Leaf].Photosynthesis.FT.Value()
          MinimumFunction Others
            VariableReference RUE_FN: VariableName=[Leaf].Photosynthesis.FN.Value()
            VariableReference RUE_FVPD: VariableName=[Leaf].Photosynthesis.FVPD.Value()
        Constant StructuralFraction: FixedValue=0.6
        Constant DMConversionEfficiencyFunction: FixedValue=1
        BiomassRemoval BiomassRemovalDefaults
          OrganBiomassRemovalType Harvest: FractionLiveToRemove=0.5; FractionDeadToRemove=0; FractionLiveToResidue=0.1; FractionDeadToResidue=0
          OrganBiomassRemovalType Cut: FractionLiveToRemove=0.8; FractionDeadToRemove=0; FractionLiveToResidue=0; FractionDeadToResidue=0
          OrganBiomassRemovalType Prune: FractionLiveToRemove=0; FractionDeadToRemove=0; FractionLiveToResidue=0.6; FractionDeadToResidue=0
          OrganBiomassRemovalType Graze: FractionLiveToRemove=0.6; FractionDeadToRemove=0; FractionLiveToResidue=0.2; FractionDeadToResidue=0
        LinearInterpolationFunction FrostFraction: XProperty=[Weather].MinT
          XYPairs: X=[-1, 0]; Y=[0, 0]
        ApexStandard
      Root: GrowthRespiration=0; MaintenanceRespiration=0
        Constant SoilWaterEffect: FixedValue=1
        PhaseLookup RootFrontVelocity
          PhaseLookupValue Emerging: Start=Germination; End=Emerged
            Constant: FixedValue=1
          PhaseLookupValue Emerged: Start=Emerged; End=Maturity
            Constant: FixedValue=10
        Constant MaximumNConc: FixedValue=0.01
        Constant MinimumNConc: FixedValue=0.005
        PhaseBasedSwitch NitrogenDemandSwitch: Start=Emerged; End=Maturity
        CompositeBiomass Live: Propertys=[[Root].LayerLive]
        CompositeBiomass Dead: Propertys=[[Root].LayerDead]
        Constant MaxDailyNUptake: FixedValue=7.5
        Constant StructuralFraction: FixedValue=1
        Constant InitialDM: FixedValue=5; Units=g/plant
        Constant SpecificRootLength: FixedValue=40; Units=m/g
        LinearInterpolationFunction KLModifier: XProperty=[Leaf].LAI
          XYPairs: X=[0, 3]; Y=[1, 1]
            XYPairs: X=[0, 3]; Y=[1, 1]
        LinearInterpolationFunction KNO3: XProperty=[Root].LengthDensity
          XYPairs: X=[0, 0.004]; Y=[0.002, 0.02]
        LinearInterpolationFunction KNH4: XProperty=[Root].LengthDensity
          XYPairs: X=[0, 0.004]; Y=[0.001, 0.01]
        Constant MaximumRootDepth: FixedValue=300
        BiomassRemoval BiomassRemovalDefaults
          OrganBiomassRemovalType Harvest: FractionLiveToRemove=0; FractionDeadToRemove=0; FractionLiveToResidue=0.2; FractionDeadToResidue=0
          OrganBiomassRemovalType Cut: FractionLiveToRemove=0; FractionDeadToRemove=0; FractionLiveToResidue=0.3; FractionDeadToResidue=0
          OrganBiomassRemovalType Prune: FractionLiveToRemove=0; FractionDeadToRemove=0; FractionLiveToResidue=0.1; FractionDeadToResidue=0
          OrganBiomassRemovalType Graze: FractionLiveToRemove=0; FractionDeadToRemove=0; FractionLiveToResidue=0.15; FractionDeadToResidue=0
          OrganBiomassRemovalType Thin: FractionLiveToRemove=0; FractionDeadToRemove=0; FractionLiveToResidue=0.05; FractionDeadToResidue=0
        Constant SenescenceRate: FixedValue=0.005
        LinearInterpolationFunction NUptakeSWFactor: XProperty=[Root].RWC
          XYPairs: X=[0, 0.2, 1]; Y=[1, 1, 1]
        PartitionFractionDemandFunction DMDemandFunction
          PhaseLookup PartitionFraction
            PhaseLookupValue Early: Start=Emerged; End=Vegetative
              Constant: FixedValue=0.1
            PhaseLookupValue Vege: Start=Vegetative; End=EarlyReproductive
              Constant: FixedValue=0.1
            PhaseLookupValue EarlyFlowering: Start=EarlyReproductive; End=Reproductive
              Constant: FixedValue=0
            PhaseLookupValue Repro: Start=Reproductive; End=Maturity
              Constant: FixedValue=0
      Cultivar Std
  Simulation FathenTest
    Clock: StartDate=2013-12-19; EndDate=2014-04-01
    Summary summaryfile
    Weather: FileName=Observations\Ruakura13-16.met
    Zone paddock: Area=1; Slope=0
      Soil Horotiu: Latitude=0; Longitude=0
        Analysis: PHUnits=Water; BoronUnits=HotWater
          Thickness  PH   CEC
          100        5.7  28.2
          200        5.3  21
          300        5.9  12
          300        6.6  12
          300        6.7  12
          300        6    12
        InitialWater Initial water: PercentMethod=EvenlyDistributed; FractionFull=1
        Water
          Thickness  BD     AirDry  LL15  DUL   SAT
          100        0.865  0.08    0.23  0.6   0.61
          200        0.865  0.069   0.21  0.51  0.61
          300        0.82   0.068   0.28  0.47  0.62
          300        0.82   0.088   0.3   0.48  0.62
          300        0.99   0.12    0.3   0.48  0.62
          300        1      0.18    0.3   0.48  0.62
          SoilCrop FodderBeetSoil: LL=[0.13, 0.13, 0.1, 0.08, 0.11, 0.11]; KL=[0.06, 0.06, 0.06, 0.06, 0.06, 0.06]; XF=[1, 1, 1, 1, 1, 1]
          SoilCrop FathenSoil: LL=[0.11, 0.114, 0.16, 0.2, 0.2, 0.2]; KL=[0.07, 0.07, 0.07, 0.04, 0.04, 0.04]; XF=[1, 1, 1, 1, 1, 1]
          SoilCrop PotatoSoil: LL=[0.13, 0.13, 0.27, 0.27, 0.3, 0.3]; KL=[0.1, 0.06, 0.03, 0.01, 0, 0]; XF=[1, 1, 0.1, 0, 0, 0]
        SoilWater: SummerDate=1-Nov; SummerU=9; SummerCona=4.4; WinterDate=1-Apr; WinterU=9; WinterCona=4.4; DiffusConst=88; DiffusSlope=35.4; Salb=0.18; CN2Bare=68; CNRed=20; CNCov=0.8; max_pond=0; Thickness=[100, 200, 300, 300, 300, 300]; SWCON=[0.55, 0.55, 0.55, 0.55, 0.55, 0.55]; residueinterception=0
        SoilNitrogen: fom_type=[default, manure, mucuna, lablab, shemp, stable]; fract_carb=[0.2, 0.3, 0.54, 0.57, 0.45, 0]; fract_cell=[0.7, 0.3, 0.37, 0.37, 0.47, 0.1]; fract_lign=[0.1, 0.4, 0.09, 0.06, 0.08, 0.9]
        SoilOrganicMatter: RootCN=30; RootWt=3000; SoilCN=11.5; EnrACoeff=7.4; EnrBCoeff=0.2; OCUnits=Total
          Thickness  OC    FBiom  FInert
          100        1.82  0.025  0.3
          200        1.47  0.025  0.4
          300        1.2   0.015  0.75
          300        1.03  0.01   0.9
          300        0.47  0.01   0.96
          300        0.47  0.01   0.96
        Sample: NO3Units=kgha; NH4Units=ppm; SWUnits=Volumetric; OCUnits=Total; PHUnits=Water
          Thickness  NO3  NH4
          100        217  0
          200        30   0
          300        5    0
          300        5    0
          300        0    0
          300        0    0
        CERESSoilTemperature
      Plant Fathen: CropType=Fathen
      MicroClimate: a_interception=0; b_interception=1; c_interception=0; d_interception=0; soil_albedo=0.23; sun_angle=15; soil_heat_flux_fraction=0.4; night_interception_fraction=0.5; refheight=2; albedo=0.26; emissivity=0.96; RadIntTotal=0
      Irrigation
      Fertiliser
      SurfaceOrganicMatter surface organic matter: PoolName=wheat; type=wheat; mass=0; standing_fraction=0; cnr=80; CriticalResidueWeight=2000; OptimumDecompTemp=20; MaxCumulativeEOS=20; CNRatioDecompCoeff=0.277; CNRatioDecompThreshold=25; TotalLeachRain=25; MinRainToLeach=10; CriticalMinimumOrganicC=0.004; DefaultCPRatio=0; DefaultStandingFraction=0; StandingExtinctCoeff=0.5; FractionFaecesAdded=0.5
        Pools:
          {PoolName=wheat, ResidueType=wheat, Mass=0, CNRatio=80, StandingFraction=0}
        ResidueTypes ResidueTypesList: LoadFromResource=ResidueTypes
      Report TestReport: EventNames=[Clock].EndOfDay
        VariableNames:
          [Clock].Today
          [Weather].MaxT
          [Weather].MinT
          [Weather].Radn
          [Weather].Rain
          [Fathen].Leaf.CoverGreen
          [Fathen].Leaf.LAI
          [Fathen].Leaf.Live.Wt
          [Fathen].Stem.Live.Wt
      Folder Manager Folder
        Operations OpperationsSchedule
          2013-12-20  [Fathen].Sow(population:1.078, cultivar:"Std", depth:5, rowSpacing:500);
      SoluteManager
    SoilArbitrator Soil Arbitrator
  DataStore
    ExcelInput: FileName=Observations\FathenObs.xlsx; SheetNames=[obs]
    ExcelInput ExcelInput1: FileName=Observations\FathenObs.xlsx; SheetNames=[FathenTestObs]
  Experiment TimeToFlowering
    Factors Sowing
      Factor Bin: Specifications=[SowingDate]
        Factor _1: Specifications=[SowingDate]
          Operations SowingDate
            2014-09-26  [Fathen].Sow(population:1.078, cultivar:"Std", depth:5, rowSpacing:500);
        Factor _2: Specifications=[SowingDate]
          Operations SowingDate
            2014-10-10  [Fathen].Sow(population:1.078, cultivar:"Std", depth:5, rowSpacing:500);
        Factor _3: Specifications=[SowingDate]
          Operations SowingDate
            2014-10-25  [Fathen].Sow(population:1.078, cultivar:"Std", depth:5, rowSpacing:500);
        Factor _4: Specifications=[SowingDate]
          Operations SowingDate
            2014-11-07  [Fathen].Sow(population:1.078, cultivar:"Std", depth:5, rowSpacing:500);
        Factor _5: Specifications=[SowingDate]
          Operations SowingDate
            2014-11-19  [Fathen].Sow(population:1.078, cultivar:"Std", depth:5, rowSpacing:500);
        Factor _6: Specifications=[SowingDate]
          Operations SowingDate
            2014-12-05  [Fathen].Sow(population:1.078, cultivar:"Std", depth:5, rowSpacing:500);
        Factor _7: Specifications=[SowingDate]
          Operations SowingDate
            2014-12-20  [Fathen].Sow(population:1.078, cultivar:"Std", depth:5, rowSpacing:500);
        Factor _8: Specifications=[SowingDate]
          Operations SowingDate
            2015-03-12  [Fathen].Sow(population:1.078, cultivar:"Std", depth:5, rowSpacing:500);
    Simulation Weed
      Clock: StartDate=2014-09-20; EndDate=2015-05-01
      Summary summaryfile
      Weather: FileName=Observations\Ruakura13-16.met
      Zone paddock: Area=1; Slope=0
        Soil Horotiu: same as FathenTest.paddock.Horotiu
        Plant Fathen: CropType=Fathen
        MicroClimate: a_interception=0; b_interception=1; c_interception=0; d_interception=0; soil_albedo=0.23; sun_angle=15; soil_heat_flux_fraction=0.4; night_interception_fraction=0.5; refheight=2; albedo=0.26; emissivity=0.96; RadIntTotal=0
        Irrigation
        Fertiliser
        SurfaceOrganicMatter surface organic matter: same as FathenTest.paddock.surface organic matter
        Report: EventNames=[Clock].EndOfDay
          VariableNames:
            [Clock].Today
            [Fathen].Leaf.CoverGreen
            [Fathen].Leaf.LAI
            [Fathen].Leaf.Live.Wt
            [Fathen].Stem.Live.Wt
            [Fathen].Structure.LeafTipsAppeared
        Folder Manager Folder
          Operations SowingDate
            2013-12-20  [Fathen].Sow(population:1.078, cultivar:"Std", depth:5, rowSpacing:500);
        SoluteManager
      SoilArbitrator Soil Arbitrator
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