Simulations: Version=129
  Replacements
    Plant FieldPea: PlantType=FieldPea; IsAlive=false; IsEnding=false; DaysAfterEnding=0
      Memo Memo1
        ## References

        ### **Ayaz S, McKenzie BA, McNeil DL, Hill GD.2004**. Light interception and utilization of four grain legumes sown at different plant populations and depths. _Journal of Agricultural Science,_**142**: 297-308.
         **Ayaz S, McKenzie BA, Hill GD, McNeil DL.2004**. Variability in yield of four grain legume species in a subhumid temperate environment. II. Yield components. _Journal of Agricultural Science,_**142**: 21-28.
         **Ayaz S, McKenzie BA, Hill GD, McNeil DL.2004**. Nitrogen distribution in four grain legumes. _Journal of Agricultural Science,_**142**: 309-317.
         **Wilson DR, Robertson MJ.1996.**Pea phenology responses to temperature and photoperiod. _Australian Agronomy Society_.
      OrganArbitrator Arbitrator
        BiomassTypeArbitrator DMArbitration
          Folder PotentialPartitioningMethods
            ReallocationMethod
            AllocateFixationMethod
            RetranslocationMethod
            SendPotentialDMAllocationsMethod
          Folder AllocationMethods
            NutrientConstrainedAllocationMethod
            DryMatterAllocationsMethod
          RelativeAllocation ArbitrationMethod
        BiomassTypeArbitrator NArbitration
          Folder PotentialPartitioningMethods
            ReallocationMethod
          Folder ActualPartitioningMethods
            AllocateFixationMethod
            RetranslocationMethod
          Folder AllocationMethods
            NitrogenAllocationsMethod
          RelativeAllocation ArbitrationMethod
          AllocateUptakesMethod
        WaterUptakeMethod
        NitrogenUptakeMethod
      Phenology
        HourlyInterpolation ThermalTime: agregationMethod=0
          XYPairs Response: X=[4.5, 30, 40]; Y=[0, 25.5, 0]
          ThreeHourSin InterpolationMethod
        PhotoperiodFunction Photoperiod: Twilight=-6; DayLength=0
        GerminatingPhase Germinating: Start=Sowing; End=Germination
        EmergingPhase Emerging: ShootLag=15; ShootRate=5; Start=Germination; End=Emergence; TTForTimeStep=0
          VariableReference ThermalTime: VariableName=[Phenology].ThermalTime
          VariableReference ThermalTime1: VariableName=[Phenology].ThermalTime
        NodeNumberPhase Vegetative: Start=Emergence; End=StartFlowering
          LinearInterpolationFunction CompletionNodeNumber
            XYPairs: X=[13, 16]; Y=[18, 15]
            VariableReference XValue: VariableName=[Phenology].Photoperiod
          VariableReference ThermalTime: VariableName=[Phenology].ThermalTime
          VariableReference LeafTipNumber: VariableName=[Structure].LeafTipsAppeared
        NodeNumberPhase Flowering: Start=StartFlowering; End=EndFlowering
          AddFunction CompletionNodeNumber
            VariableReference VegetativeNodes: VariableName=[Phenology].NFF
            LinearInterpolationFunction FloweringNodes
              XYPairs: X=[13, 16]; Y=[10, 7]
              VariableReference XValue: VariableName=[Phenology].Photoperiod
          MultiplyFunction Target
            VariableReference NodeNumberDuration: VariableName=[Phenology].Flowering.CompletionNodeNumber.FloweringNodes
            VariableReference Phyllochron: VariableName=[Structure].Phyllochron
          VariableReference ThermalTime: VariableName=[Phenology].ThermalTime
          VariableReference LeafTipNumber: VariableName=[Structure].LeafTipsAppeared
        GenericPhase GrainFilling: Start=EndFlowering; End=EndGrainFill
          Constant Target: FixedValue=500
          VariableReference Progression: VariableName=[Phenology].ThermalTime
        GenericPhase Maturing: Start=EndGrainFill; End=Maturity
          Constant Target: FixedValue=60
          VariableReference Progression: VariableName=[Phenology].ThermalTime
        GenericPhase Ripening: Start=Maturity; End=HarvestRipe
          Constant Target: FixedValue=1
          VariableReference Progression: VariableName=[Phenology].ThermalTime
        EndPhase ReadyForHarvesting: Start=HarvestRipe; End=Unused
          VariableReference ThermalTime: VariableName=[Phenology].ThermalTime
        OnEventFunction NFF: SetEvent=StartFlowering; ReSetEvent=never
          Constant PreEventValue: FixedValue=0
          VariableReference PostEventValue: VariableName=[Phenology].Vegetative.CompletionNodeNumber
        OnEventFunction FN: SetEvent=EndFlowering; ReSetEvent=never
          Constant PreEventValue: FixedValue=0
          SubtractFunction PostEventValue
            VariableReference PostEventValue: VariableName=[Structure].LeafTipsAppeared
            VariableReference PostEventValue1: VariableName=[Phenology].NFF
      Structure: CohortInitialisationStage=Germination; LeafInitialisationStage=Emergence
        VariableReference ThermalTime: VariableName=[Phenology].ThermalTime
        Constant DroughtInducedBranchMortality: FixedValue=0
        Constant FinalLeafNumber: FixedValue=40
        LinearInterpolationFunction HeightModel
          XYPairs: X=[0, 300]; Y=[10, 750]
          VariableReference XValue: VariableName=[Stem].Live.Wt
        MultiplyFunction BranchingRate
          LinearInterpolationFunction Potential_Branching_Rate
            XYPairs: X=[0, 4, 5, 7, 8]; Y=[0, 0, 1, 1, 0]
            VariableReference XValue: VariableName=[Structure].LeafTipsAppeared
          LinearInterpolationFunction Cover_response
            XYPairs: X=[0, 0.17, 0.25]; Y=[1, 1, 0]
            VariableReference XValue: VariableName=[leaf].CoverGreen
          LinearInterpolationFunction CHO_response
            XYPairs: X=[0, 1, 10]; Y=[1, 1, 1]
            VariableReference XValue: VariableName=[Stem].Live.StorageWt
        Constant BranchMortality: FixedValue=0
        PhaseLookup Phyllochron
          PhaseLookupValue Vegetative: Start=Emergence; End=StartFlowering
            Constant Function: FixedValue=30
          PhaseLookupValue Flowering: Start=StartFlowering; End=EndFlowering
            Constant Function: FixedValue=40
        Constant StemSenescenceAge: FixedValue=0
      ReproductiveOrgan Grain: GrowthRespiration=0; MaintenanceRespiration=0
        Biomass Live: DMDOfStructural=0.6
        Biomass Dead: DMDOfStructural=0.6
        Constant MaximumPotentialGrainSize: FixedValue=0.4
        PhaseLookup DMDemandFunction
          PhaseLookupValue GrainFilling: Start=StartFlowering; End=EndGrainFill
            FillingRateFunction
              VariableReference NumberFunction: VariableName=[Grain].NumberFunction
              AddFunction FillingDuration
                VariableReference FillingDuration: VariableName=[Phenology].GrainFilling.Target
                VariableReference FillingDuration1: VariableName=[Phenology].GrainFilling.Target
              VariableReference ThermalTime: VariableName=[Phenology].ThermalTime
              VariableReference PotentialSizeIncrement: VariableName=[Grain].MaximumPotentialGrainSize
        Constant MinimumNConc: FixedValue=0.02
        Constant MaximumNConc: FixedValue=0.03
        Constant WaterContent: FixedValue=0.12
        PhaseLookup NFillingRate
          PhaseLookupValue GrainFilling: Start=StartFlowering; End=EndGrainFill
            FillingRateFunction
              VariableReference NumberFunction: VariableName=[Grain].NumberFunction
              AddFunction FillingDuration
                VariableReference FillingDuration: VariableName=[Phenology].Flowering.Target
                VariableReference FillingDuration1: VariableName=[Phenology].GrainFilling.Target
              VariableReference ThermalTime: VariableName=[Phenology].ThermalTime
              MultiplyFunction PotentialSizeIncrement
                Constant MaximumFinalNConc: FixedValue=0.04
                VariableReference MaximumSize: VariableName=[Grain].MaximumPotentialGrainSize
        MultiplyFunction NumberFunction
          Constant PeasPerPod: FixedValue=3
          VariableReference PodNumber: VariableName=[Shell].PodNumber
        BiomassRemoval BiomassRemovalDefaults
          OrganBiomassRemovalType Harvest: FractionLiveToRemove=1; FractionDeadToRemove=0; FractionLiveToResidue=0; FractionDeadToResidue=0
          OrganBiomassRemovalType Cut: FractionLiveToRemove=1; FractionDeadToRemove=0; FractionLiveToResidue=0; FractionDeadToResidue=0
          OrganBiomassRemovalType Prune: FractionLiveToRemove=0; FractionDeadToRemove=0; FractionLiveToResidue=0.8; FractionDeadToResidue=0
          OrganBiomassRemovalType Graze: FractionLiveToRemove=0.6; FractionDeadToRemove=0; FractionLiveToResidue=0.2; FractionDeadToResidue=0
        Constant DMConversionEfficiency: FixedValue=1
        Constant RemobilisationCost: FixedValue=0
        Constant CarbonConcentration: FixedValue=0.4
      Root: GrowthRespiration=0; MaintenanceRespiration=0
        RootShapeCylindre RootShape
        LinearInterpolationFunction KLModifier
          XYPairs: X=[0, 3]; Y=[1, 1]
          VariableReference XValue: VariableName=[Leaf].LAI
        HourlyInterpolation TemperatureEffect: agregationMethod=0
          XYPairs Response: X=[0, 26, 35]; Y=[1, 1, 1]
          ThreeHourSin InterpolationMethod
        Constant MaxDailyNUptake: FixedValue=6
        Constant SenescenceRate: FixedValue=0
        Constant MaximumRootDepth: FixedValue=1000000
        PhaseLookup RootFrontVelocity
          PhaseLookupValue PreEmergence: Start=Germination; End=Emergence
            Constant Function: FixedValue=3
          PhaseLookupValue early: Start=Emergence; End=StartFlowering
            Constant Function: FixedValue=15
          PhaseLookupValue late: Start=StartFlowering; End=Maturity
            Constant Function: FixedValue=17
        Constant MaximumNConc: FixedValue=0.01
        Constant MinimumNConc: FixedValue=0.005
        PhaseLookupValue NitrogenDemandSwitch: Start=Emergence; End=EndGrainFill
          Constant: FixedValue=1
        LinearInterpolationFunction KNO3
          XYPairs: X=[0, 0.003]; Y=[0.02, 0.02]
          VariableReference XValue: VariableName=[Root].LengthDensity
        LinearInterpolationFunction KNH4
          XYPairs: X=[0, 0.003]; Y=[0, 0]
          VariableReference XValue: VariableName=[Root].LengthDensity
        BiomassRemoval BiomassRemovalDefaults
          OrganBiomassRemovalType Harvest: FractionLiveToRemove=0; FractionDeadToRemove=0; FractionLiveToResidue=0.2; FractionDeadToResidue=0
          OrganBiomassRemovalType Cut: FractionLiveToRemove=0; FractionDeadToRemove=0; FractionLiveToResidue=0.3; FractionDeadToResidue=0
          OrganBiomassRemovalType Prune: FractionLiveToRemove=0; FractionDeadToRemove=0; FractionLiveToResidue=0.1; FractionDeadToResidue=0
          OrganBiomassRemovalType Graze: FractionLiveToRemove=0; FractionDeadToRemove=0; FractionLiveToResidue=0.15; FractionDeadToResidue=0
        LinearInterpolationFunction NUptakeSWFactor
          XYPairs: X=[0, 1]; Y=[0, 1]
          VariableReference XValue: VariableName=[Root].RWC
        Constant SpecificRootLength: FixedValue=40; Units=m/g
        Constant DMConversionEfficiency: FixedValue=1
        Constant MaintenanceRespirationFunction: FixedValue=1
        Constant RemobilisationCost: FixedValue=0
        Constant CarbonConcentration: FixedValue=0.4
        BiomassDemand DMDemands
          MultiplyFunction Structural
            PartitionFractionDemandFunction DMDemandFunction
              PhaseLookup PartitionFraction
                PhaseLookupValue Early: Start=Emergence; End=StartFlowering
                  Constant Function: FixedValue=0.1
                PhaseLookupValue Middle: Start=StartFlowering; End=EndFlowering
                  Constant Function: FixedValue=0.08
                PhaseLookupValue Late: Start=EndFlowering; End=Maturity
                  Constant Function: FixedValue=0
            Constant StructuralFraction: FixedValue=1
          Constant Metabolic: FixedValue=0
          StorageDMDemandFunction Storage
            SubtractFunction StorageFraction
              Constant One: FixedValue=1
              VariableReference StructuralFraction: VariableName=[Root].DMDemands.Structural.StructuralFraction
        BiomassDemand NDemands
          MultiplyFunction Structural
            VariableReference MinNconc: VariableName=[Root].minimumNconc
            VariableReference PotentialDMAllocation: VariableName=[Root].potentialDMAllocation.Structural
          MultiplyFunction Metabolic
            SubtractFunction MetabolicNconc
              VariableReference CritNconc: VariableName=[Root].criticalNConc
              VariableReference MinNconc: VariableName=[Root].minimumNconc
            VariableReference PotentialDMAllocation: VariableName=[Root].potentialDMAllocation.Structural
          StorageNDemandFunction Storage
            VariableReference NitrogenDemandSwitch: VariableName=[Root].nitrogenDemandSwitch
            VariableReference MaxNconc: VariableName=[Root].maximumNconc
        VariableReference CriticalNConc: VariableName=[Root].MinimumNConc
        BiomassDemand InitialWt
          Constant Structural: FixedValue=0.2; Units=g/plant
          Constant Metabolic: FixedValue=0
          Constant Storage: FixedValue=0
        Constant RootDepthStressFactor: FixedValue=1
      Nodule
        Constant FixationMetabolicCost: FixedValue=7
        Constant MaximumNConc: FixedValue=0.02
        Constant MinimumNConc: FixedValue=0.01
        Constant SenescenceRate: FixedValue=0
        Constant NReallocationFactor: FixedValue=0
        PhaseLookupValue NitrogenDemandSwitch: Start=Emergence; End=EndGrainFill
          Constant: FixedValue=1
        BiomassRemoval BiomassRemovalDefaults
          OrganBiomassRemovalType Harvest: FractionLiveToRemove=0.5; FractionDeadToRemove=0; FractionLiveToResidue=0.1; FractionDeadToResidue=0
          OrganBiomassRemovalType Cut: FractionLiveToRemove=0.8; FractionDeadToRemove=0; FractionLiveToResidue=0; FractionDeadToResidue=0
          OrganBiomassRemovalType Prune: FractionLiveToRemove=0; FractionDeadToRemove=0; FractionLiveToResidue=0.6; FractionDeadToResidue=0
          OrganBiomassRemovalType Graze: FractionLiveToRemove=0.6; FractionDeadToRemove=0; FractionLiveToResidue=0.2; FractionDeadToResidue=0
        Constant InitialWtFunction: FixedValue=0; Units=g/m^2
        Constant DetachmentRateFunction: FixedValue=0; Units=/d
        MultiplyFunction FixationRate
          VariableReference NoduleWt: VariableName=[Nodule].Live.Wt
          Constant SpecificNitrogenaseActivity: FixedValue=0
          MinimumFunction
            HourlyInterpolation FT: agregationMethod=0
              XYPairs Response: X=[0, 20, 30, 40]; Y=[0, 1, 1, 0]
              ThreeHourSin InterpolationMethod
            LinearInterpolationFunction FW
              XYPairs: X=[0, 1, 1.5]; Y=[0, 1, 1]
              VariableReference XValue: VariableName=[Leaf].Fw
            LinearInterpolationFunction FWlog
              XYPairs: X=[0, 1, 1.5]; Y=[1, 1, 1]
              VariableReference XValue: VariableName=[Leaf].Fw
        Constant MaintenanceRespirationFunction: FixedValue=0; Units=0-1
        Constant DMConversionEfficiency: FixedValue=1; Units=0-1
        Constant NRetranslocationFactor: FixedValue=0
        Constant DMReallocationFactor: FixedValue=0
        Constant DMRetranslocationFactor: FixedValue=0
        VariableReference CriticalNConc: VariableName=[Nodule].MinimumNConc
        Constant RemobilisationCost: FixedValue=0
        Constant CarbonConcentration: FixedValue=0.4
        BiomassDemand DMDemands
          MultiplyFunction Structural
            PartitionFractionDemandFunction DMDemandFunction
              PhaseLookup PartitionFraction
                PhaseLookupValue Early: Start=Emergence; End=StartFlowering
                  Constant Function: FixedValue=0.03
                PhaseLookupValue Middle: Start=StartFlowering; End=EndFlowering
                  Constant Function: FixedValue=0.02
                PhaseLookupValue Late: Start=EndFlowering; End=Maturity
                  Constant Function: FixedValue=0
            Constant StructuralFraction: FixedValue=1; Units=g/g
          Constant Metabolic: FixedValue=0
          StorageDMDemandFunction Storage
            SubtractFunction StorageFraction
              Constant One: FixedValue=1
              VariableReference StructuralFraction: VariableName=[Nodule].DMDemands.Structural.StructuralFraction
        BiomassDemand NDemands
          MultiplyFunction Structural
            VariableReference MinNconc: VariableName=[Nodule].minimumNconc
            VariableReference PotentialDMAllocation: VariableName=[Nodule].potentialDMAllocation.Structural
          MultiplyFunction Metabolic
            SubtractFunction MetabolicNconc
              VariableReference CritNconc: VariableName=[Nodule].criticalNConc
              VariableReference MinNconc: VariableName=[Nodule].minimumNconc
            VariableReference PotentialDMAllocation: VariableName=[Nodule].potentialDMAllocation.Structural
          StorageNDemandFunction Storage
            VariableReference NitrogenDemandSwitch: VariableName=[Nodule].nitrogenDemandSwitch
            VariableReference MaxNconc: VariableName=[Nodule].maximumNconc
      GenericOrgan Shell: IsAboveGround=true
        Constant NReallocationFactor: FixedValue=0
        Constant NRetranslocationFactor: FixedValue=0.1
        Constant MaximumNConc: FixedValue=0.03
        Constant MinimumNConc: FixedValue=0.01
        Constant DMRetranslocationFactor: FixedValue=0.1
        PhaseLookupValue NitrogenDemandSwitch: Start=Germination; End=Maturity
          Constant: FixedValue=1
        MultiplyFunction PodNumber
          Constant PodsPerNode: FixedValue=1
          VariableReference StemPopulation: VariableName=[Structure].TotalStemPopn
          PhaseLookupValue FloweringNodes: Start=StartFlowering; End=HarvestRipe
            SubtractFunction FloweringNodes
              VariableReference TotalNodes: VariableName=[Structure].LeafTipsAppeared
              VariableReference VegetativeNodes: VariableName=[Phenology].NFF
        BiomassRemoval BiomassRemovalDefaults: same as Replacements.FieldPea.Nodule.BiomassRemovalDefaults
        Constant SenescenceRate: FixedValue=0; Units=/d
        Constant DetachmentRateFunction: FixedValue=0; Units=/d
        Constant MaintenanceRespirationFunction: FixedValue=0; Units=0-1
        Constant DMConversionEfficiency: FixedValue=1; Units=0-1
        Constant DMReallocationFactor: FixedValue=0
        VariableReference CriticalNConc: VariableName=[Shell].MinimumNConc
        Constant RemobilisationCost: FixedValue=0
        Constant CarbonConcentration: FixedValue=0.4
        BiomassDemand DMDemands
          MultiplyFunction Structural
            PopulationBasedDemandFunction DMDemandFunction
              VariableReference ThermalTime: VariableName=[Phenology].ThermalTime
              VariableReference OrganPopulation: VariableName=[Shell].PodNumber
              Constant ExpansionStress: FixedValue=1
              AddFunction GrowthDuration
                VariableReference FloweringGrowthPeriod: VariableName=[Phenology].Flowering.Target
                Constant PostFloweringGrowthPeriod: FixedValue=60
              Constant StartStage: FixedValue=4
              Constant MaximumOrganWt: FixedValue=0.5
            Constant StructuralFraction: FixedValue=0.7
          Constant Metabolic: FixedValue=0
          StorageDMDemandFunction Storage
            SubtractFunction StorageFraction
              Constant One: FixedValue=1
              VariableReference StructuralFraction: VariableName=[Shell].DMDemands.Structural.StructuralFraction
        BiomassDemand NDemands
          MultiplyFunction Structural
            VariableReference MinNconc: VariableName=[Shell].minimumNconc
            VariableReference PotentialDMAllocation: VariableName=[Shell].potentialDMAllocation.Structural
          MultiplyFunction Metabolic
            SubtractFunction MetabolicNconc
              VariableReference CritNconc: VariableName=[Shell].criticalNConc
              VariableReference MinNconc: VariableName=[Shell].minimumNconc
            VariableReference PotentialDMAllocation: VariableName=[Shell].potentialDMAllocation.Structural
          StorageNDemandFunction Storage
            VariableReference NitrogenDemandSwitch: VariableName=[Shell].nitrogenDemandSwitch
            VariableReference MaxNconc: VariableName=[Shell].maximumNconc
        RetranslocateNonStructural RetranslocateNitrogen
        BiomassDemand InitialWt
          Constant Structural: FixedValue=0; Units=g/m^2
          Constant Metabolic: FixedValue=0
          Constant Storage: FixedValue=0
      Leaf: MaxCover=1; R50=200; KDead=0.3; MaximumMainStemLeafNumber=40
        zero: CurrentExpandingLeaf, StartFractionExpanded, FractionNextleafExpanded, DeadNodesYesterday, GrowthRespiration, Albedo, Gsmax350, LAI, Depth, Width, FRGR, PotentialEP, WaterDemand, TipsAtEmergence, CohortsAtInitialisation, FractionDied
        LeafCohort InitialLeaf1: Rank=1; Area=100
          zero: NReallocationFactor, DMReallocationFactor, NRetranslocationFactor, DMRetranslocationFactor, ShadeInducedSenRate, SenescedFrac, DeltaPotentialArea, DeltaStressConstrainedArea, DeltaCarbonConstrainedArea, PotentialStructuralDMAllocation, PotentialMetabolicDMAllocation, MetabolicNReallocated, MetabolicWtReallocated, StorageNReallocated, StorageWtReallocated, MetabolicNRetranslocated, StorageNRetrasnlocated, DMRetranslocated, MetabolicNAllocation, StructuralDMAllocation, MetabolicDMAllocation, MaintenanceRespiration
        LeafCohort InitialLeaf2: Rank=2
          zero: NReallocationFactor, DMReallocationFactor, NRetranslocationFactor, DMRetranslocationFactor, ShadeInducedSenRate, SenescedFrac, DeltaPotentialArea, DeltaStressConstrainedArea, DeltaCarbonConstrainedArea, PotentialStructuralDMAllocation, PotentialMetabolicDMAllocation, MetabolicNReallocated, MetabolicWtReallocated, StorageNReallocated, StorageWtReallocated, MetabolicNRetranslocated, StorageNRetrasnlocated, DMRetranslocated, MetabolicNAllocation, StructuralDMAllocation, MetabolicDMAllocation, Area, MaintenanceRespiration
        VariableReference ThermalTime: VariableName=[Phenology].ThermalTime
        LeafCohortParameters: ExpansionStressValue=0; CellDivisionStressValue=0; DroughtInducedLagAccelerationValue=0; DroughtInducedSenAccelerationValue=0; ShadeInducedSenescenceRateValue=0; SenessingLeafRelativeSizeValue=0
          Constant SenessingLeafRelativeSize: FixedValue=1; Units=0-1
          LinearInterpolationFunction GrowthDuration
            XYPairs: X=[1, 4.5, 6]; Y=[90, 90, 40]
            VariableReference XValue: VariableName=[Phenology].Stage
          LinearInterpolationFunction MaxArea
            XYPairs: X=[1, 2, 3, 4, 5, 6, 7, 8]; Y=[0, 1000, 2000, 3000, 4000, 2000, 0, 0]
            VariableReference XValue: VariableName=[Phenology].Stage
          LinearInterpolationFunction LagDuration
            XYPairs: X=[1, 4.5, 4.75, 5, 6]; Y=[400, 400, 200, 100, 50]
            VariableReference XValue: VariableName=[Phenology].Stage
          LinearInterpolationFunction SenescenceDuration
            XYPairs: X=[1, 5, 5.5, 6]; Y=[80, 80, 40, 10]
            VariableReference XValue: VariableName=[Phenology].Stage
          Constant DetachmentLagDuration: FixedValue=1000000
          Constant DetachmentDuration: FixedValue=1000000
          LinearInterpolationFunction SpecificLeafAreaMax
            XYPairs: X=[0, 4, 6, 8]; Y=[90000, 40000, 40000, 40000]
            VariableReference XValue: VariableName=[Leaf].LAI
          Constant StructuralFraction: FixedValue=0.5
          LinearInterpolationFunction SpecificLeafAreaMin
            XYPairs: X=[0, 4, 6, 8]; Y=[45000, 20000, 20000, 20000]
            VariableReference XValue: VariableName=[Leaf].LAI
          LinearInterpolationFunction ExpansionStress
            XYPairs: X=[0, 1]; Y=[0, 1]
            VariableReference XValue: VariableName=[FieldPea].Leaf.Fw
          Constant MinimumNConc: FixedValue=0.03
          Constant CriticalNConc: FixedValue=0.05
          Constant MaximumNConc: FixedValue=0.08
          Constant NReallocationFactor: FixedValue=1
          Constant NRetranslocationFactor: FixedValue=0
          Constant DMRetranslocationFactor: FixedValue=0.5
          LinearInterpolationFunction ShadeInducedSenescenceRate
            XYPairs: X=[0, 0.9, 0.90001]; Y=[0, 0, 0]
            VariableReference XValue: VariableName=[Leaf].CohortCurrentRankCoverAbove
          Constant InitialNConc: FixedValue=0
          Constant StorageFraction: FixedValue=0
          Constant DMReallocationFactor: FixedValue=0
          Constant LeafSizeShapeParameter: FixedValue=0.01
          Constant MaintenanceRespirationFunction: FixedValue=0
          Constant DroughtInducedSenAcceleration: FixedValue=1
          Constant CellDivisionStress: FixedValue=1; Units=0-1
          Constant CellDivisionStress1: FixedValue=1; Units=0-1
          Constant CellDivisionStress2: FixedValue=1; Units=0-1
          Constant CellDivisionStress3: FixedValue=1; Units=0-1
          Constant CellDivisionStress4: FixedValue=1; Units=0-1
          Constant DroughtInducedLagAcceleration: FixedValue=1
          ArrayFunction LagDurationAgeMultiplier: Values=1 1 1
          ArrayFunction SenescenceDurationAgeMultiplier: Values=1 1 1
          ArrayFunction LeafSizeAgeMultiplier: Values=1 1 1 1 1 1 1 1 1 1 1 1
          Constant RemobilisationCost: FixedValue=0
          Constant CarbonConcentration: FixedValue=0.4
        LinearInterpolationFunction ExtinctionCoeff
          XYPairs: X=[0, 0.5]; Y=[0.7, 0.7]
          VariableReference XValue: VariableName=[Leaf].LAI
        RUEModel Photosynthesis
          Constant RUE: FixedValue=1
          WeightedTemperatureFunction FT: MaximumTemperatureWeighting=0.5
            XYPairs: X=[0, 15, 30, 40]; Y=[0, 1, 1, 0]
          LinearInterpolationFunction FVPD
            XYPairs: X=[0, 10, 50]; Y=[1, 1, 1]
            VariableReference XValue: VariableName=[Leaf].Photosynthesis.VPD
          LinearInterpolationFunction FN
            XYPairs: X=[0, 1, 1.5]; Y=[1, 1, 1]
            VariableReference XValue: VariableName=[Leaf].Fn
          LinearInterpolationFunction FW
            XYPairs: X=[0, 1, 1.5]; Y=[1, 1, 1]
            VariableReference XValue: VariableName=[Leaf].Fw
          RUECO2Function FCO2: PhotosyntheticPathway=C3
          Memo
            Ayaz eta 2004 presented a RUE of 1.6 g/MJ PAR during non-limiting temperature conditions for field pea.  Halving this to make it total radiation gives 0.8 g/MJ and adding 20% to account for root and  nodule production and N fixiation costs gives 1.0 g/MJ
          VariableReference RadnInt: VariableName=[Leaf].RadiationIntercepted
        MinimumFunction FRGRFunction
          VariableReference RUE_FT: VariableName=[Leaf].Photosynthesis.FT
          MinimumFunction Others
            VariableReference RUE_FN: VariableName=[Leaf].Photosynthesis.FN
            VariableReference RUE_FVPD: VariableName=[Leaf].Photosynthesis.FVPD
        LinearInterpolationFunction FrostFraction
          XYPairs: X=[-1, 0]; Y=[0, 0]
          VariableReference XValue: VariableName=[Weather].MinT
        BiomassRemoval BiomassRemovalDefaults
          OrganBiomassRemovalType Harvest: FractionLiveToRemove=0; FractionDeadToRemove=0; FractionLiveToResidue=0.3; FractionDeadToResidue=0
          OrganBiomassRemovalType Cut: FractionLiveToRemove=0.8; FractionDeadToRemove=0; FractionLiveToResidue=0; FractionDeadToResidue=0
          OrganBiomassRemovalType Prune: FractionLiveToRemove=0; FractionDeadToRemove=0; FractionLiveToResidue=0.6; FractionDeadToResidue=0
          OrganBiomassRemovalType Graze: FractionLiveToRemove=0.6; FractionDeadToRemove=0; FractionLiveToResidue=0.1; FractionDeadToResidue=0
        Constant StructuralFraction: FixedValue=0.5
        Constant DMConversionEfficiency: FixedValue=1
        Constant RemobilisationCost: FixedValue=0
        Constant CarbonConcentration: FixedValue=0.4
        Constant StomatalConductanceCO2Modifier: FixedValue=1
        Constant WidthFunction: FixedValue=0
        VariableReference DepthFunction: VariableName=[Leaf].Height
      GenericOrgan Stem: IsAboveGround=true
        Constant NReallocationFactor: FixedValue=0
        Constant NRetranslocationFactor: FixedValue=0.1
        Constant DMRetranslocationFactor: FixedValue=0.1
        Constant MaximumNConc: FixedValue=0.03
        Constant MinimumNConc: FixedValue=0.01
        PhaseLookupValue NitrogenDemandSwitch: Start=Emergence; End=EndGrainFill
          Constant: FixedValue=1
        BiomassRemoval BiomassRemovalDefaults: same as Replacements.FieldPea.Nodule.BiomassRemovalDefaults
        Constant SenescenceRate: FixedValue=0; Units=/d
        Constant DetachmentRateFunction: FixedValue=0; Units=/d
        Constant MaintenanceRespirationFunction: FixedValue=0; Units=0-1
        Constant DMConversionEfficiency: FixedValue=1; Units=0-1
        Constant DMReallocationFactor: FixedValue=0
        VariableReference CriticalNConc: VariableName=[Stem].MinimumNConc
        Constant RemobilisationCost: FixedValue=0
        Constant CarbonConcentration: FixedValue=0.4
        BiomassDemand DMDemands
          MultiplyFunction Structural
            InternodeDemandFunction DMDemandFunction
              Constant InterNodeWt: FixedValue=0.1
            Constant StructuralFraction: FixedValue=0.7
          Constant Metabolic: FixedValue=0
          StorageDMDemandFunction Storage
            SubtractFunction StorageFraction
              Constant One: FixedValue=1
              VariableReference StructuralFraction: VariableName=[Stem].DMDemands.Structural.StructuralFraction
        BiomassDemand NDemands
          MultiplyFunction Structural
            VariableReference MinNconc: VariableName=[Stem].minimumNconc
            VariableReference PotentialDMAllocation: VariableName=[Stem].potentialDMAllocation.Structural
          MultiplyFunction Metabolic
            SubtractFunction MetabolicNconc
              VariableReference CritNconc: VariableName=[Stem].criticalNConc
              VariableReference MinNconc: VariableName=[Stem].minimumNconc
            VariableReference PotentialDMAllocation: VariableName=[Stem].potentialDMAllocation.Structural
          StorageNDemandFunction Storage
            VariableReference NitrogenDemandSwitch: VariableName=[Stem].nitrogenDemandSwitch
            VariableReference MaxNconc: VariableName=[Stem].maximumNconc
        EnergyBalance: Albedo=0; Gsmax350=0; R50=0; KDead=0; LAIDead=0
          MinimumFunction FRGRer
            VariableReference RUE_FT: VariableName=[Stem].Photosynthesis.FT
            MinimumFunction Others
              VariableReference RUE_FN: VariableName=[Stem].Photosynthesis.FN
              VariableReference RUE_FVPD: VariableName=[Stem].Photosynthesis.FVPD
          Constant StomatalConductanceCO2Modifier: FixedValue=1
          VariableReference Tallness: VariableName=[Structure].Height
          VariableReference Deepness: VariableName=[Structure].Height
          Constant DeadAreaIndex: FixedValue=1
          MultiplyFunction GreenAreaIndex
            Constant VolumeToArea: FixedValue=1.5
            DivideFunction Volume
              VariableReference Wt: VariableName=[Stem].Wt
              Constant Density: FixedValue=10000; Units=g/l
          Constant GreenExtinctionCoefficient: FixedValue=1.5
          Constant Wideness: FixedValue=0
          Constant DeadExtinctionCoefficient: FixedValue=0
        RUEModel Photosynthesis: same as Replacements.FieldPea.Leaf.Photosynthesis
        RetranslocateNonStructural RetranslocateNitrogen
        BiomassDemand InitialWt
          Constant Structural: FixedValue=0; Units=g/m^2
          Constant Metabolic: FixedValue=0
          Constant Storage: FixedValue=0
      CompositeBiomass AboveGround: DMDOfStructural=0.6
        Propertys=[[Leaf].Live, [Leaf].Dead, [Stem].Live, [Stem].Dead, [Grain].Live, [Grain].Dead, [Shell].Live, [Shell].Dead]
      CompositeBiomass BelowGround: Propertys=[[Root].Live, [Root].Dead, [Nodule].Live, [Nodule].Dead]; DMDOfStructural=0.6
      CompositeBiomass Total: DMDOfStructural=0.6
        Propertys=[[Leaf].Live, [Leaf].Dead, [Stem].Live, [Stem].Dead, [Grain].Live, [Grain].Dead, [Shell].Live, [Shell].Dead, [Root].Live, [Root].Dead, [Nodule].Live, [Nodule].Dead]
      CompositeBiomass TotalLive: DMDOfStructural=0.6
        Propertys=[[Leaf].Live, [Stem].Live, [Grain].Live, [Shell].Live, [Root].Live, [Nodule].Live]
      CompositeBiomass TotalDead: DMDOfStructural=0.6
        Propertys=[[Leaf].Dead, [Stem].Dead, [Grain].Dead, [Shell].Dead, [Root].Dead, [Nodule].Dead]
      CompositeBiomass Pod: Propertys=[[Shell].Live, [Shell].Dead, [Grain].Live, [Grain].Dead]; DMDOfStructural=0.6
      Cultivar Primo
      Cultivar Rex
      Cultivar Excel
      Cultivar Kaspa
      Cultivar Mutka
      Cultivar Parafield
      Cultivar Parv
      Cultivar Crusader
      Cultivar Massey
        Command:
          [Phenology].Vegetative.CompletionNodeNumber.XYPairs.X = 13,16
          [Phenology].Vegetative.CompletionNodeNumber.XYPairs.Y = 8.2, 7.5
          [Phenology].Flowering.CompletionNodeNumber.FloweringNodes.XYPairs.X = 14,16
          [Phenology].Flowering.CompletionNodeNumber.FloweringNodes.XYPairs.Y = 6.5, 4
      Cultivar Patea
        Command:
          [Phenology].Vegetative.CompletionNodeNumber.XYPairs.X = 12,16
          [Phenology].Vegetative.CompletionNodeNumber.XYPairs.Y = 12,10.9
          [Phenology].Flowering.CompletionNodeNumber.FloweringNodes.XYPairs.X = 14,16
          [Phenology].Flowering.CompletionNodeNumber.FloweringNodes.XYPairs.Y = 6,4
      Cultivar Trounce
        Command:
          [Phenology].Vegetative.CompletionNodeNumber.XYPairs.X = 12,16
          [Phenology].Vegetative.CompletionNodeNumber.XYPairs.Y = 13.7,12
          [Phenology].Flowering.CompletionNodeNumber.FloweringNodes.XYPairs.X = 14,16
          [Phenology].Flowering.CompletionNodeNumber.FloweringNodes.XYPairs.Y = 6,3
      Cultivar Rovar
        Command:
          [Phenology].Vegetative.CompletionNodeNumber.XYPairs.X = 12,16
          [Phenology].Vegetative.CompletionNodeNumber.XYPairs.Y = 13.7,12
          [Phenology].Flowering.CompletionNodeNumber.FloweringNodes.XYPairs.X = 14,16
          [Phenology].Flowering.CompletionNodeNumber.FloweringNodes.XYPairs.Y = 5,5
      Cultivar Whero
        Command:
          [Phenology].Vegetative.CompletionNodeNumber.XYPairs.X = 12,16
          [Phenology].Vegetative.CompletionNodeNumber.XYPairs.Y = 18,18
          [Phenology].Flowering.CompletionNodeNumber.FloweringNodes.XYPairs.X = 13,16
          [Phenology].Flowering.CompletionNodeNumber.FloweringNodes.XYPairs.Y = 4,4
      Memo
        ## References

        ### **Ayaz S, McKenzie BA, McNeil DL, Hill GD.** **2004**. Light interception and utilization of four grain legumes sown at different plant populations and depths. _Journal of Agricultural Science,_ **142**: 297-308.
         **Ayaz S, McKenzie BA, Hill GD, McNeil DL.** **2004**. Variability in yield of four grain legume species in a subhumid temperate environment. II. Yield components. _Journal of Agricultural Science,_ **142**: 21-28.
         **Ayaz S, McKenzie BA, Hill GD, McNeil DL.** **2004**. Nitrogen distribution in four grain legumes. _Journal of Agricultural Science,_ **142**: 309-317.
         **Wilson DR, Robertson MJ.** **1996.** Pea phenology responses to temperature and photoperiod. _Australian Agronomy Society_.
      Cultivar A_green
        Command:
          [Stem].DMDemands.Structural.DMDemandFunction.InterNodeWt.FixedValue = 0.25
          [Phenology].GrainFilling.Target.FixedValue = 750
      Cultivar B_yellow
        Command:
          [Stem].DMDemands.Structural.DMDemandFunction.InterNodeWt.FixedValue = 0.2
          [Phenology].GrainFilling.Target.FixedValue = 1000
      Constant MortalityRate: FixedValue=0
  DataStore
    ExcelInput Observed: SheetNames=[ObservedBiomass, ObservedNodes]
      FileNames=[%root%\Prototypes\FieldPea\Observations\FieldPeaObservations.xlsx]
    Input
      FileNames=[%root%\Prototypes\FieldPea\Observations\SowingDateNodes.txt]
    Input Pheno
      FileNames=[%root%\Prototypes\FieldPea\Observations\SowingDatePhenology.txt]
    PredictedObserved PhenologyTest: PredictedTableName=Report; ObservedTableName=Pheno; FieldNameUsedForMatch=FieldPeaHarvestRule.Script.FinalLeafTag; AllColumns=false
      Tests: POName=PhenologyTest
        AcceptedStats:
          Name  n     Slope     Intercept  SEslope     SEintercept  R2        RMSE      NSE       ME         MAE       RSR
          FN    3299  0.314586  3.18583    0.0120777   0.0591408    0.170656  1.19061   0.046451  -0.064713  0.986977  0.97635
          FNN   3299  0.857286  2.05537    0.00607426  0.104351     0.857985  1.31079   0.847134  -0.34923   1.15316   0.390922
          NFF   3299  0.961139  0.185958   0.00281149  0.0352543    0.972563  0.612416  0.96484   -0.284517  0.464614  0.187482
        AcceptedStatsName=Name n Slope Intercept SEslope SEintercept R2 RMSE NSE ME MAE RSR
    PredictedObserved BiomassTest: PredictedTableName=Report; ObservedTableName=ObservedBiomass; FieldNameUsedForMatch=Clock.Today; AllColumns=false
      Tests: POName=BiomassTest
        AcceptedStats:
          Name                     n    Slope     Intercept  SEslope    SEintercept  R2        RMSE     NSE        ME        MAE      RSR
          FieldPea.AboveGround.Wt  138  0.736123  93.0733    0.0259032  13.6759      0.855871  149.213  0.838868   -5.86054  86.5513  0.399956
          FieldPea.Grain.Live.Wt   138  0.667062  23.4736    0.0196563  3.61661      0.894383  66.6325  0.836036   -3.93054  35.4138  0.403455
          FieldPea.Leaf.Live.Wt    138  1.15173   21.8604    0.0832434  6.49324      0.58464   54.1754  -0.460731  31.5465   41.6843  1.20422
          FieldPea.Pod.Wt          138  0.748609  28.6882    0.0212356  5.19476      0.90136   74.6314  0.875359   -2.2588   37.3541  0.351763
          FieldPea.Shell.Live.Wt   138  0.705842  13.6714    0.0398615  2.99375      0.697475  34.7302  0.696672   1.67174   17.5895  0.548753
          FieldPea.Stem.Live.Wt    138  0.360746  65.8074    0.0200574  5.16559      0.704018  131.585  0.441284   -54.3611  76.1681  0.74476
        AcceptedStatsName=Name n Slope Intercept SEslope SEintercept R2 RMSE NSE ME MAE RSR
  Experiment Lincoln1997
    Factors
      Permutation
        Factor Sowing
          CompositeFactor 23Dec
            Specifications:
              [FieldPeaSowingRule].Script.SowingDate=1997-12-23
              [FieldPeaSowingRule].Script.SowingDepth=20
          CompositeFactor 19Feb
            Specifications:
              [FieldPeaSowingRule].Script.SowingDate=1998-02-19
              [FieldPeaSowingRule].Script.SowingDepth=20
          CompositeFactor 14Sep
            Specifications:
              [FieldPeaSowingRule].Script.SowingDate=1998-9-14
              [FieldPeaSowingRule].Script.SowingDepth=20
          CompositeFactor 18Nov
            Specifications:
              [FieldPeaSowingRule].Script.SowingDate=1998-11-18
              [FieldPeaSowingRule].Script.SowingDepth=20
        Factor Population
          CompositeFactor 50
            Specifications:
              [FieldPeaSowingRule].Script.SowingRate=45
              [FieldPeaSowingRule].Script.RowSpacing=150
          CompositeFactor 100
            Specifications:
              [FieldPeaSowingRule].Script.SowingRate=90
              [FieldPeaSowingRule].Script.RowSpacing=150
          CompositeFactor 150
            Specifications:
              [FieldPeaSowingRule].Script.SowingRate=135
              [FieldPeaSowingRule].Script.RowSpacing=150
    Simulation BaseSimulation
      Clock: Start=1997-12-01; End=1999-07-01
      Summary summaryfile
      Weather: FileName=%root%\Examples\WeatherFiles\lincoln.met
      SoilArbitrator Soil Arbitrator
      Zone paddock: Area=1; Slope=0; AspectAngle=0; Altitude=50
        Soil: Latitude=0; Longitude=0
          Chemical
            Thickness  NO3N     NH4N  PH
            100        180.833  0     6.6
            200        12.5     0     6.2
            300        1.38889  0     5.7
            300        1.38889  0     5.5
            300        0        0     5.5
            300        0        0     5.5
          InitialWater Initial water: PercentMethod=1; FractionFull=1
          Physical
            Thickness  BD   AirDry  LL15  DUL   SAT
            100        1.2  0.08    0.13  0.33  0.5
            200        1.2  0.13    0.13  0.33  0.5
            300        1.2  0.1     0.1   0.31  0.44
            300        1.2  0.06    0.06  0.15  0.46
            300        1.2  0.04    0.04  0.1   0.44
            300        1.2  0.02    0.02  0.06  0.44
            SoilCrop FieldPeaSoil: LL=[0.13, 0.13, 0.1, 0.08, 0.1, 0.06]; KL=[0.06, 0.06, 0.06, 0.06, 0.06, 0.06]; XF=[1, 1, 1, 1, 1, 1]
            SoilCrop FieldPea1Soil: LL=[0.13, 0.13, 0.27, 0.15, 0.1, 0.06]; KL=[0.1, 0.06, 0.03, 0.01, 0, 0]; XF=[1, 1, 0.1, 0, 0, 0]
          WaterBalance SoilWater: SummerDate=1-Nov; SummerU=9; SummerCona=4.4; WinterDate=1-Apr; WinterU=9; WinterCona=4.4; DiffusConst=88; DiffusSlope=35.4; Salb=0.18; CN2Bare=68; CNRed=20; CNCov=0.8; Thickness=[100, 200, 300, 300, 300, 300]; SWCON=[0.55, 0.55, 0.55, 0.55, 0.55, 0.55]
          SoilNitrogen: fom_types=[default, manure, mucuna, lablab, shemp, stable]; fract_carb=[0.2, 0.3, 0.54, 0.57, 0.45, 0]; fract_cell=[0.7, 0.3, 0.37, 0.37, 0.47, 0.1]; fract_lign=[0.1, 0.4, 0.09, 0.06, 0.08, 0.9]; NPartitionApproach=0
            SoilNitrogenNO3 NO3
            SoilNitrogenNH4 NH4
            SoilNitrogenUrea Urea
            SoilNitrogenPlantAvailableNO3 PlantAvailableNO3
            SoilNitrogenPlantAvailableNH4 PlantAvailableNH4
          Organic: FOMCNRatio=30
            Thickness  Carbon  SoilCNRatio  FBiom  FInert  FOM
            100        1.82    11.5         0.025  0.3     1243.93
            200        1.47    11.5         0.025  0.4     833.832
            300        1.2     11.5         0.015  0.75    457.617
            300        1.03    11.5         0.01   0.9     251.145
            300        0.47    11.5         0.01   0.96    137.831
            300        0.47    11.5         0.01   0.96    75.6435
          CERESSoilTemperature Temperature
        MicroClimate: a_interception=0; b_interception=1; c_interception=0; d_interception=0; soil_albedo=0.23; SoilHeatFluxFraction=0.4; MinimumHeightDiffForNewLayer=0; NightInterceptionFraction=0.5; ReferenceHeight=2
        Irrigation
        Fertiliser
        Manager DiagnosticsVariables
```csharp
using Models.Climate;
using APSIM.Shared.Utilities;
using System.Xml.Serialization;
using Models;
using Models.PMF;
using Models.Soils;
using System.Text;
using System.Collections.Generic;
using Models.Core;
using System;
using Models.Interfaces;
using Models.Soils.Nutrients;
using Models.PMF.Organs;
namespace Models
{
    [Serializable] 
    public class Script : Model
    {      
        [Link] private Clock Clock;
        [Link] private Weather Met;
        [Link] private Fertiliser Fert;
        [Link] private Irrigation Irrig;
        [Link] private Plant FieldPea;
        [Link] private Zone zone;
        [Link(ByName = true)]
        private ISolute Urea;
        [Link(ByName = true)]
        private ISolute NO3;
        [Link(ByName = true)]
        private ISolute NH4;
        [Link(ByName = true)]
        private SoilNitrogen SoilNitrogen;
        [Link] private Soils.Soil Soil;
        [Link] private Models.Surface.SurfaceOrganicMatter SOM;
        [Link(Type = LinkType.Path, Path = "[FieldPea].Root")]
        private Root root;
        [Link]
        private IPhysical soilPhysical;
        [Link]
        private ISoilWater waterBalance;
                    
        [XmlIgnore] public bool InitialDay { get; set; }
        
        [XmlIgnore] public double AccumPlantN { get; set; }
        [XmlIgnore] public double AccumMineralisation { get; set; }
        [XmlIgnore] public double AccumDenit { get; set; }
        [XmlIgnore] public double AccumFert { get; set; }
        [XmlIgnore] public double AccumLeach { get; set; }
        [XmlIgnore] public double AccumDetach { get; set; }
        [XmlIgnore] public double DeltaSoilOMN { get; set; }
        [XmlIgnore] public double DeltaSurfaceOMN { get; set; }
        [XmlIgnore] public double DeltaSoilMineralN { get; set; }
        [XmlIgnore] public double SoilNitrogenContent { get; set; }
        
        [XmlIgnore] public double AccumEO { get; set; }
        [XmlIgnore] public double AccumEP { get; set; }
        [XmlIgnore] public double AccumES { get; set; }
        [XmlIgnore] public double AccumDrainage { get; set; }
        [XmlIgnore] public double AccumRunoff { get; set; }
        [XmlIgnore] public double AccumOutflowLat { get; set; }
        [XmlIgnore] public double AccumIrrigation { get; set; }
        [XmlIgnore] public double AccumRainfall { get; set; }
        [XmlIgnore] public double SoilWaterDeficit { get; set; }
    
        [XmlIgnore] public double  InitialSoilOMN { get; set; }
        [XmlIgnore] public double  InitialSurfaceOMN { get; set; }
        [XmlIgnore] public double  InitialMineralN { get; set; }
        
        [XmlIgnore] public double SWC { get; set; }
        [XmlIgnore] public double DUL { get; set; }
        [XmlIgnore] public double OutFlowLat { get; set; }

        [XmlIgnore] public double FomN { get; set; }
        [XmlIgnore] public double BiomN { get; set; }
        [XmlIgnore] public double HumN { get; set; }
        [XmlIgnore] public double OrganicN { get; set; }
        [XmlIgnore] public double NO3N { get; set; }
        [XmlIgnore] public double NH4N { get; set; }
        [XmlIgnore] public double UreaN { get; set; }
        [XmlIgnore] public double MineralN { get; set; }
        [XmlIgnore] public double DltNMinRes { get; set; }
        [XmlIgnore] public double DltNMinTot { get; set; }
        
        [EventSubscribe("StartOfSimulation")]
        private void OnSimulationCommencing(object sender, EventArgs e)
        {
            InitialDay = true;
        }       
        
        [EventSubscribe("DoManagement")]
        private void OnDoManagement(object sender, EventArgs e)
        {
            //!!!!!! Nitrogen balance components !!!!!!
            //!!!!!!^^^^^^^^^^^^^^^^^^^^^^^^^^^^^!!!!!!
               FomN = MathUtilities.Sum(SoilNitrogen.FOMN);
            HumN = MathUtilities.Sum(SoilNitrogen.HumicN);
            BiomN = MathUtilities.Sum(SoilNitrogen.MicrobialN);
            OrganicN = FomN + HumN + BiomN;
            NO3N = MathUtilities.Sum(NO3.kgha);
            NH4N = MathUtilities.Sum(NH4.kgha);
            UreaN = MathUtilities.Sum(Urea.kgha);
            MineralN = NO3N + NH4N + UreaN; 
            DltNMinRes = MathUtilities.Sum(SoilNitrogen.dlt_n_min_res);
            DltNMinTot = MathUtilities.Sum(SoilNitrogen.MineralisedN);
            int layers = soilPhysical.Thickness.Length;
            if (InitialDay == true)
            {
                InitialSurfaceOMN = SOM.N;
                InitialSoilOMN = OrganicN;
                InitialMineralN = MineralN;
                InitialDay = false;
            }
            AccumFert += Fert.NitrogenApplied;
            DeltaSurfaceOMN = SOM.N - InitialSurfaceOMN;
            AccumLeach = AccumLeach - waterBalance.LeachNH4 - waterBalance.LeachNO3 - waterBalance.LeachUrea; //Fails
            AccumMineralisation += MathUtilities.Sum(SoilNitrogen.MineralisedN);
            AccumDenit -= MathUtilities.Sum(SoilNitrogen.Denitrification);
            AccumPlantN -= (double)zone.Get("FieldPea.Root.NUptake");
            DeltaSoilOMN = OrganicN - InitialSoilOMN;
            DeltaSoilMineralN = MineralN - InitialMineralN;
            SoilNitrogenContent = MineralN;
            
            //!!!!!! Water balance components !!!!!!
            //!!!!!!^^^^^^^^^^^^^^^^^^^^^^^^^^!!!!!!

            AccumIrrigation += Irrig.IrrigationApplied;
            AccumRainfall += Met.Rain;
            //AccumEP -= (double)zone.Get("[FieldPea].Leaf.Transpiration");
            AccumEP -= (double)zone.Get("FieldPea.Root.WaterUptake");
            SoilWaterDeficit =  (SWC - DUL);
            double OutFlowLat = MathUtilities.Sum(waterBalance.LateralOutflow);
            AccumOutflowLat -= OutFlowLat;
        }
        
        [EventSubscribe("DoManagementCalculations")]
        private void OnDoManagementCalculations(object sender, EventArgs e)
        {
            FomN = MathUtilities.Sum(SoilNitrogen.FOMN);
            HumN = MathUtilities.Sum(SoilNitrogen.HumicN);
            BiomN = MathUtilities.Sum(SoilNitrogen.MicrobialN);
            
            
            AccumEO -= waterBalance.Eo;
            AccumES -= waterBalance.Es; 
            AccumDrainage -= waterBalance.Drainage;
            AccumRunoff -= waterBalance.Runoff;
            SWC = MathUtilities.Sum(waterBalance.SWmm);
            DUL = MathUtilities.Sum(soilPhysical.DULmm);
        }
    }
}
```
        SurfaceOrganicMatter surface organic matter: InitialResidueName=wheat; InitialResidueType=wheat; InitialResidueMass=0; InitialStandingFraction=0; InitialCPR=0; InitialCNR=80
        Report: EventNames=[Clock].DoReport
          VariableNames:
            [Clock].Today
            [DiagnosticsVariables].Script.AccumPlantN
            [DiagnosticsVariables].Script.AccumMineralisation
            [DiagnosticsVariables].Script.AccumDenit
            [DiagnosticsVariables].Script.AccumFert
            [DiagnosticsVariables].Script.AccumLeach
            [DiagnosticsVariables].Script.AccumDetach
            [DiagnosticsVariables].Script.DeltaSoilOMN
            [DiagnosticsVariables].Script.DeltaSurfaceOMN
            [DiagnosticsVariables].Script.DeltaSoilMineralN
            [FieldPea].Root.NSupply
            [Soil].SoilWater.Eo
            [Soil].SoilWater.Es
            [DiagnosticsVariables].Script.SWC
            [DiagnosticsVariables].Script.DUL
            [Soil].SoilWater.Drainage
            [Soil].SoilWater.Runoff
            [DiagnosticsVariables].Script.OutFlowLat
            [Soil].SoilWater.pond
            [DiagnosticsVariables].Script.AccumEO
            [DiagnosticsVariables].Script.AccumEP
            [DiagnosticsVariables].Script.AccumES
            [DiagnosticsVariables].Script.AccumDrainage
            [DiagnosticsVariables].Script.AccumRunoff
            [DiagnosticsVariables].Script.AccumRainfall
            [DiagnosticsVariables].Script.AccumIrrigation
            [DiagnosticsVariables].Script.AccumOutflowLat
            [DiagnosticsVariables].Script.SoilWaterDeficit
            [FieldPea].Grain.Live.Wt
            [FieldPea].Shell.Live.Wt
            [FieldPea].Stem.Live.Wt
            [FieldPea].Stem.Live.Wt
            [FieldPea].Grain.Live.N
            [FieldPea].Shell.Live.N
            [FieldPea].Leaf.Live.Wt
            [FieldPea].Root.Live.Wt
            [FieldPea].Leaf.Live.N
            [FieldPea].Root.Live.N
            [FieldPea].Leaf.Live.NConc
            [FieldPea].Root.Live.NConc
            [FieldPea].Root.WaterUptake
            [FieldPea].Leaf.Transpiration
            [FieldPea].Leaf.WaterDemand
            [FieldPea].Root.Depth
            [FieldPea].Leaf.CoverTotal
            [FieldPea].Leaf.CoverDead
            [FieldPea].Leaf.LAI
            [FieldPea].Leaf.Height
            [Soil].SoilWater.SWmm
            [Soil].SoilNitrogen.NO3.kgha
            [DiagnosticsVariables].Script.SoilNitrogenContent
            [FieldPea].Arbitrator.N.TotalPlantDemand
            [DiagnosticsVariables].Script.FomN
            [DiagnosticsVariables].Script.HumN
            [DiagnosticsVariables].Script.BiomN
            [DiagnosticsVariables].Script.DltNMinRes
            [DiagnosticsVariables].Script.DltNMinTot
            [FieldPea].Leaf.Fw
            [FieldPea].Leaf.Fn
            [FieldPea].Phenology.CurrentPhase.Name
            [FieldPea].Phenology.Stage
            [FieldPea].Pod.Wt
            [FieldPea].Pod.N
            [FieldPea].Structure.LeafTipsAppeared
            [FieldPea].Leaf.CohortArea[1]
            [FieldPea].Leaf.CohortArea[2]
            [FieldPea].Leaf.CohortArea[3]
            [FieldPea].Leaf.CohortArea[4]
            [FieldPea].Leaf.CohortArea[5]
            [FieldPea].Leaf.CohortArea[6]
            [FieldPea].Leaf.CohortArea[7]
            [FieldPea].Leaf.CohortArea[8]
            [FieldPea].Leaf.CohortArea[9]
            [FieldPea].Leaf.CohortArea[10]
            [FieldPea].Leaf.CohortArea[11]
            [FieldPea].Leaf.CohortArea[12]
            [FieldPea].Leaf.CohortArea[13]
            [FieldPea].Leaf.CohortArea[14]
            [FieldPea].Leaf.CohortArea[15]
            [FieldPea].Leaf.AppearedCohortNo
            [FieldPea].Leaf.DeadCohortNo
            [FieldPea].AboveGround.Wt
            [FieldPea].Phenology.Stage
            [FieldPea].Phenology.NFF
            [FieldPeaHarvestRule].Script.FinalTag
            [FieldPea].Grain.NumberFunction
            [FieldPea].Shell.PodNumber
            [FieldPea].Phenology.FN
        Manager FieldPeaSowingRule
          RowSpacing = 150
          SowingDepth = 20
          SowingRate = 100
          CultivarName = Primo
          SowingDate = 1997-12-23
```csharp
using APSIM.Shared.Utilities;
using Models.PMF;
using Models.Core;
using System;
        
        namespace Models
        {
           [Serializable] 
           [System.Xml.Serialization.XmlInclude(typeof(Model))]
            public class Script : Model
            {      
               [Link] Plant FieldPea;
               [Link] Clock Clock;

               [Description("Spacing (mm) between rows")]
               public double RowSpacing { get; set; }
               [Description("Depth (mm) Grains are planted")]
               public double SowingDepth { get; set; }
               [Description("Seeds sown (/m2)")]
               public double SowingRate { get; set; }
               [Description("Cultivar")]
               [Display(Type=DisplayType.CultivarName)]
               public string CultivarName { get; set; }
               [Description("Sowing Date")]
               public DateTime SowingDate { get; set; }

               [EventSubscribe("DoManagement")]
               private void OnDoManagement(object sender, EventArgs e)
               {
                if (Clock.Today.Date == SowingDate)
                    FieldPea.Sow(population:SowingRate, cultivar:CultivarName, depth:SowingDepth, rowSpacing:RowSpacing, budNumber:1);
                //FieldPea.Sow(... Contains the following arguements:
                //Population  double  Required  Seeds sowing/m2
                //Cultivar    string  Required  "NameOfCultivar"
                //Depth       double  Optional  Depth (mm) seed sown.   Default is 100mm 
                //MaxCover    double  Optional  Proportion (0-1) of the ground row crop will cover.   Default is 1.0
                //BudNumber   double  Optional  Number of mainstems per seed sown.  Default is 1.0
                //RowSpacing  double  Optional  Spaceing (mm) between drill rows when crop is sown.  Default is 150mm
                //CropClass   string  Optional  Crop class to instantiate when crop is sown.  Default is "Plant"
               }
            }
        }
```
        Manager FieldPeaHarvestRule
```csharp
using Models.PMF.Phen;
using System;
using Models.Core;
using Models.PMF;
using System.Xml.Serialization;
using APSIM.Shared.Utilities;
        
namespace Models
{
    [Serializable] 
    [System.Xml.Serialization.XmlInclude(typeof(Model))]
    public class Script : Model
    {
        [Link] private Plant FieldPea;
        [Link] private Clock Clock;
        [Link] private Summary Summary;
        [Link(Type = LinkType.Path, Path = "[FieldPea].Phenology")]
        private Phenology phenology;
        [XmlIgnore] public string FinalTag { get; set; }
        [XmlIgnore] public bool Harvested { get; set; }
        [XmlIgnore] public bool ReadyForHarvest { get; set; }
               
        [EventSubscribe("StartOfSimulation")]
        private void OnSimulationCommencing(object sender, EventArgs e)
        {
            FinalTag = "";
            Harvested = false;
            ReadyForHarvest = false;
        }
               
        [EventSubscribe("DoManagement")]
        private void OnDoManagement(object sender, EventArgs e)
        {
            if (ReadyForHarvest == true)
            {
                FieldPea.Harvest();
                FieldPea.EndCrop();
                ReadyForHarvest = false;
                Harvested = true;
            }
            FinalTag = "";    
        }
               
        [EventSubscribe("DoManagementCalculations")]
        private void OnDoManagementCalculations(object sender, EventArgs e)
        {
            if ((phenology.Stage >= 8) && (Harvested == false))
            {
                FinalTag = "yield";
                ReadyForHarvest = true;
            }
        }
    }
}
```
        Report Harvest: EventNames=[FieldPea].Harvesting
          VariableNames:
            [Clock].Today
            [FieldPea].Phenology.NFF
            [FieldPeaHarvestRule].Script.FinalTag
        Operations
          1998-01-07  [Irrigation].Apply(25);
          1998-01-14  [Irrigation].Apply(25);
          1998-01-21  [Irrigation].Apply(25);
          1998-01-28  [Irrigation].Apply(25);
          1998-02-07  [Irrigation].Apply(25);
          1998-02-14  [Irrigation].Apply(25);
          1998-02-21  [Irrigation].Apply(25);
          1998-02-28  [Irrigation].Apply(25);
          1998-03-07  [Irrigation].Apply(25);
          1998-03-14  [Irrigation].Apply(25);
          1998-03-21  [Irrigation].Apply(25);
          1998-03-28  [Irrigation].Apply(25);
        Plant FieldPea
  Experiment Lincoln1993
    Factors
      Permutation
        Factor Sowing
          CompositeFactor 19Oct1993
            Specifications:
              [FieldPeaSowingRule].Script.SowingDate=1993-10-19
              [Clock].StartDate=1993-10-19
              [Clock].EndDate=1994-04-19
          CompositeFactor 23Nov1993
            Specifications:
              [FieldPeaSowingRule].Script.SowingDate=1993-11-23
              [Clock].StartDate=1993-11-23
              [Clock].EndDate=1994-04-19
          CompositeFactor 21Dec1993
            Specifications:
              [FieldPeaSowingRule].Script.SowingDate=1993-12-21
              [Clock].StartDate=1993-12-21
              [Clock].EndDate=1994-04-19
          CompositeFactor 19Jan1994
            Specifications:
              [FieldPeaSowingRule].Script.SowingDate=1994-01-19
              [Clock].StartDate=1994-01-19
              [Clock].EndDate=1994-05-19
          CompositeFactor 22Feb1994
            Specifications:
              [FieldPeaSowingRule].Script.SowingDate=1994-02-22
              [Clock].StartDate=1994-02-22
              [Clock].EndDate=1994-08-19
          CompositeFactor 23Mar1994
            Specifications:
              [FieldPeaSowingRule].Script.SowingDate=1994-03-23
              [Clock].StartDate=1994-03-23
              [Clock].EndDate=1994-09-19
          CompositeFactor 20Apr1994
            Specifications:
              [FieldPeaSowingRule].Script.SowingDate=1994-04-20
              [Clock].StartDate=1994-04-20
              [Clock].EndDate=1994-12-19
          CompositeFactor 24May1994
            Specifications:
              [FieldPeaSowingRule].Script.SowingDate=1994-05-24
              [Clock].StartDate=1994-05-24
              [Clock].EndDate=1994-12-19
          CompositeFactor 17Jul1994
            Specifications:
              [FieldPeaSowingRule].Script.SowingDate=1994-07-17
              [Clock].StartDate=1994-07-17
              [Clock].EndDate=1995-01-19
          CompositeFactor 15Aug1994
            Specifications:
              [FieldPeaSowingRule].Script.SowingDate=1994-08-15
              [Clock].StartDate=1994-08-15
              [Clock].EndDate=1995-01-19
          CompositeFactor 15Sep1994
            Specifications:
              [FieldPeaSowingRule].Script.SowingDate=1994-09-15
              [Clock].StartDate=1994-09-15
              [Clock].EndDate=1995-01-19
          CompositeFactor 12Oct1994
            Specifications:
              [FieldPeaSowingRule].Script.SowingDate=1994-10-12
              [Clock].StartDate=1994-10-12
              [Clock].EndDate=1995-01-19
        Factor Cultivar
          CompositeFactor Massey
            Specifications:
              [FieldPeaSowingRule].Script.CultivarName=Massey
              [FieldPeaSowingRule].Script.RowSpacing=150
          CompositeFactor Patea
            Specifications:
              [FieldPeaSowingRule].Script.CultivarName=Patea
              [FieldPeaSowingRule].Script.RowSpacing=150
          CompositeFactor Trounce
            Specifications:
              [FieldPeaSowingRule].Script.CultivarName=Trounce
              [FieldPeaSowingRule].Script.RowSpacing=150
          CompositeFactor Rovar
            Specifications:
              [FieldPeaSowingRule].Script.CultivarName=Rovar
              [FieldPeaSowingRule].Script.RowSpacing=150
          CompositeFactor Whero
            Specifications:
              [FieldPeaSowingRule].Script.CultivarName=Whero
              [FieldPeaSowingRule].Script.RowSpacing=150
    Simulation BaseSimulation1
      Clock: Start=1993-10-15; End=1995-01-01
      Summary summaryfile
      Weather: FileName=%root%\Examples\WeatherFiles\lincoln.met
      SoilArbitrator Soil Arbitrator
      Zone paddock: Area=1; Slope=0; AspectAngle=0; Altitude=50
        Soil: same as Lincoln1997.BaseSimulation.paddock.Soil
        Plant FieldPea
        MicroClimate: a_interception=0; b_interception=1; c_interception=0; d_interception=0; soil_albedo=0.23; SoilHeatFluxFraction=0.4; MinimumHeightDiffForNewLayer=0; NightInterceptionFraction=0.5; ReferenceHeight=2
        Irrigation
        Fertiliser
        SurfaceOrganicMatter surface organic matter: InitialResidueName=wheat; InitialResidueType=wheat; InitialResidueMass=0; InitialStandingFraction=0; InitialCPR=0; InitialCNR=80
        Report: EventNames=[Clock].DoReport
          VariableNames:
            [Clock].Today
            [FieldPea].Structure.LeafTipsAppeared
            [FieldPea].Structure.LeafTipsAppeared as FNN
            [FieldPea].Leaf.DeadCohortNo
            [FieldPea].Phenology.Stage
            [FieldPea].Phenology.NFF as NFF
            [FieldPea].Phenology.FN as FN
            [FieldPeaHarvestRule].Script.FinalLeafTag
        Manager FieldPeaSowingRule
          RowSpacing = 150
          SowingDepth = 20
          SowingRate = 50
          CultivarName = Massey
          SowingDate = 1997-12-23
          script: same as in Lincoln1997.BaseSimulation.paddock.FieldPeaSowingRule
        Manager FieldPeaHarvestRule
```csharp
using Models.PMF.Phen;
using System;
using Models.Core;
using Models.PMF;
using System.Xml.Serialization;
using APSIM.Shared.Utilities;
        
        namespace Models
        {
           [Serializable] 
           [System.Xml.Serialization.XmlInclude(typeof(Model))]
            public class Script : Model
            {      
        [Link] private Plant FieldPea;
        [Link] private Clock Clock;
        [Link] private Summary Summary;
        [Link(Type = LinkType.Path, Path = "[FieldPea].Phenology")]
        private Phenology phenology;
               [XmlIgnore] public string FinalTag { get; set;}
               [XmlIgnore] public string FinalLeafTag { get; set;}
               [XmlIgnore] public bool Harvested {get; set;}
               [XmlIgnore] public bool ReadyForHarvest {get; set;}
               [XmlIgnore] public bool LeavesFinished {get; set;}
               
               [EventSubscribe("StartOfSimulation")]
               private void OnSimulationCommencing(object sender, EventArgs e)
               {
               FinalTag = "";
               FinalLeafTag = "";
               Harvested = false;
               ReadyForHarvest = false;
               LeavesFinished = false;
               }
               
               [EventSubscribe("DoManagement")]
               private void OnDoManagement(object sender, EventArgs e)
               {
               if (ReadyForHarvest == true)
                   {
                   FieldPea.Harvest();
                   FieldPea.EndCrop();
                   ReadyForHarvest = false;
                   Harvested = true;
                   }
               FinalTag = "";    
               }
               
               [EventSubscribe("DoManagementCalculations")]
               private void OnDoManagementCalculations(object sender, EventArgs e)
               {
                if ((phenology.Stage >= 10)&&(Harvested == false))
                {
                    FinalTag = "yield";
                    ReadyForHarvest = true;
                }
                if ((phenology.Stage >= 5)&&(LeavesFinished == false))
                {
                    FinalLeafTag = "FinalLeaf";
                    LeavesFinished = true;
                }
               }
            }
        }
```
  Experiment Roseworthy
    Factors
      Permutation
        Factor Sowing: same as Lincoln1997.Factors.Permutation.Sowing
        Factor Population
          CompositeFactor 50
            Specifications:
              [FieldPeaSowingRule].Script.SowingRate=50
              [FieldPeaSowingRule].Script.RowSpacing=150
          CompositeFactor 100
            Specifications:
              [FieldPeaSowingRule].Script.SowingRate=100
              [FieldPeaSowingRule].Script.RowSpacing=150
          CompositeFactor 150
            Specifications:
              [FieldPeaSowingRule].Script.SowingRate=150
              [FieldPeaSowingRule].Script.RowSpacing=150
    Simulation BaseSimulation2
      Clock: Start=1997-12-01; End=1999-07-01
      Summary summaryfile
      Weather: FileName=%root%\Examples\WeatherFiles\lincoln.met
      SoilArbitrator Soil Arbitrator
      Zone paddock: Area=1; Slope=0; AspectAngle=0; Altitude=50
        Soil: same as Lincoln1997.BaseSimulation.paddock.Soil
        Plant FieldPea
        MicroClimate: a_interception=0; b_interception=1; c_interception=0; d_interception=0; soil_albedo=0.23; SoilHeatFluxFraction=0.4; MinimumHeightDiffForNewLayer=0; NightInterceptionFraction=0.5; ReferenceHeight=2
        Irrigation
        Fertiliser
        Manager DiagnosticsVariables: same as Lincoln1997.BaseSimulation.paddock.DiagnosticsVariables
        SurfaceOrganicMatter surface organic matter: InitialResidueName=wheat; InitialResidueType=wheat; InitialResidueMass=0; InitialStandingFraction=0; InitialCPR=0; InitialCNR=80
        Report: EventNames=[Clock].DoReport
          VariableNames:
            [Clock].Today
            [DiagnosticsVariables].Script.AccumPlantN
            [DiagnosticsVariables].Script.AccumMineralisation
            [DiagnosticsVariables].Script.AccumDenit
            [DiagnosticsVariables].Script.AccumFert
            [DiagnosticsVariables].Script.AccumLeach
            [DiagnosticsVariables].Script.AccumDetach
            [DiagnosticsVariables].Script.DeltaSoilOMN
            [DiagnosticsVariables].Script.DeltaSurfaceOMN
            [DiagnosticsVariables].Script.DeltaSoilMineralN
            [FieldPea].Root.NSupply
            [Soil].SoilWater.Eo
            [Soil].SoilWater.Es
            [DiagnosticsVariables].Script.SWC
            [DiagnosticsVariables].Script.DUL
            [Soil].SoilWater.Drainage
            [Soil].SoilWater.Runoff
            [DiagnosticsVariables].Script.OutFlowLat
            [Soil].SoilWater.pond
            [DiagnosticsVariables].Script.AccumEO
            [DiagnosticsVariables].Script.AccumEP
            [DiagnosticsVariables].Script.AccumES
            [DiagnosticsVariables].Script.AccumDrainage
            [DiagnosticsVariables].Script.AccumRunoff
            [DiagnosticsVariables].Script.AccumRainfall
            [DiagnosticsVariables].Script.AccumIrrigation
            [DiagnosticsVariables].Script.AccumOutflowLat
            [DiagnosticsVariables].Script.SoilWaterDeficit
            [FieldPea].Grain.Live.Wt
            [FieldPea].Shell.Live.Wt
            [FieldPea].Stem.Live.Wt
            [FieldPea].Stem.Live.Wt
            [FieldPea].Grain.Live.N
            [FieldPea].Shell.Live.N
            [FieldPea].Leaf.Live.Wt
            [FieldPea].Root.Live.Wt
            [FieldPea].Leaf.Live.N
            [FieldPea].Root.Live.N
            [FieldPea].Leaf.Live.NConc
            [FieldPea].Root.Live.NConc
            [FieldPea].Root.WaterUptake
            [FieldPea].Leaf.Transpiration
            [FieldPea].Leaf.WaterDemand
            [FieldPea].Root.Depth
            [FieldPea].Leaf.CoverTotal
            [FieldPea].Leaf.CoverDead
            [FieldPea].Leaf.LAI
            [FieldPea].Leaf.Height
            [Soil].SoilWater.SWmm
            [Soil].SoilNitrogen.NO3.kgha
            [DiagnosticsVariables].Script.SoilNitrogenContent
            [FieldPea].Arbitrator.N.TotalPlantDemand
            [DiagnosticsVariables].Script.FomN
            [DiagnosticsVariables].Script.HumN
            [DiagnosticsVariables].Script.BiomN
            [DiagnosticsVariables].Script.DltNMinRes
            [DiagnosticsVariables].Script.DltNMinTot
            [FieldPea].Leaf.Fw
            [FieldPea].Leaf.Fn
            [FieldPea].Phenology.CurrentPhase.Name
            [FieldPea].Phenology.Stage
            [FieldPea].Pod.Wt
            [FieldPea].Pod.N
            [FieldPea].Structure.LeafTipsAppeared
            [FieldPea].Leaf.CohortArea[1]
            [FieldPea].Leaf.CohortArea[2]
            [FieldPea].Leaf.CohortArea[3]
            [FieldPea].Leaf.CohortArea[4]
            [FieldPea].Leaf.CohortArea[5]
            [FieldPea].Leaf.CohortArea[6]
            [FieldPea].Leaf.CohortArea[7]
            [FieldPea].Leaf.CohortArea[8]
            [FieldPea].Leaf.CohortArea[9]
            [FieldPea].Leaf.CohortArea[10]
            [FieldPea].Leaf.CohortArea[11]
            [FieldPea].Leaf.CohortArea[12]
            [FieldPea].Leaf.CohortArea[13]
            [FieldPea].Leaf.CohortArea[14]
            [FieldPea].Leaf.CohortArea[15]
            [FieldPea].Leaf.AppearedCohortNo
            [FieldPea].Leaf.DeadCohortNo
            [FieldPea].AboveGround.Wt
            [FieldPea].Phenology.Stage
            [FieldPea].Phenology.NFF
            [FieldPeaHarvestRule].Script.FinalTag
        Manager FieldPeaSowingRule
          RowSpacing = 150
          SowingDepth = 20
          SowingRate = 50
          CultivarName = Primo
          SowingDate = 1997-12-23
          script: same as in Lincoln1997.BaseSimulation.paddock.FieldPeaSowingRule
        Manager FieldPeaHarvestRule
```csharp
using Models.PMF.Phen;
using System;
using Models.Core;
using Models.PMF;
using System.Xml.Serialization;
using APSIM.Shared.Utilities;
        
        namespace Models
        {
           [Serializable] 
           [System.Xml.Serialization.XmlInclude(typeof(Model))]
            public class Script : Model
            {      
        [Link] private Plant FieldPea;
        [Link] private Clock Clock;
        [Link] private Summary Summary;
        [Link(Type = LinkType.Path, Path = "[FieldPea].Phenology")]
        private Phenology phenology;
               [XmlIgnore] public string FinalTag { get; set;}
               [XmlIgnore] public bool Harvested {get; set;}
               [XmlIgnore] public bool ReadyForHarvest {get; set;}
               
               [EventSubscribe("StartOfSimulation")]
               private void OnSimulationCommencing(object sender, EventArgs e)
               {
               FinalTag = "";
               Harvested = false;
               ReadyForHarvest = false;
               }
               
               [EventSubscribe("DoManagement")]
               private void OnDoManagement(object sender, EventArgs e)
               {
               if (ReadyForHarvest == true)
                   {
                   FieldPea.Harvest();
                   FieldPea.EndCrop();
                   ReadyForHarvest = false;
                   Harvested = true;
                   }
               FinalTag = "";    
               }
               
               [EventSubscribe("DoManagementCalculations")]
               private void OnDoManagementCalculations(object sender, EventArgs e)
               {
                if ((phenology.Stage >= 10)&&(Harvested == false))
                {
                    FinalTag = "yield";
                    ReadyForHarvest = true;
                }
               }
            }
        }
```
        Report Harvest: EventNames=[FieldPea].Harvesting
          VariableNames:
            [Clock].Today
            [FieldPea].Phenology.NFF
            [FieldPeaHarvestRule].Script.FinalTag
  Experiment NFixationTest
    Factors
      Factor NFert
        CompositeFactor 0
          Specifications:
            [FieldPeaSowingRule].Script.SowingFert=0
            [FieldPeaSowingRule].Script.SowingDepth=20
        CompositeFactor 100
          Specifications:
            [FieldPeaSowingRule].Script.SowingFert=100
            [FieldPeaSowingRule].Script.SowingDepth=20
        CompositeFactor 300
          Specifications:
            [FieldPeaSowingRule].Script.SowingFert=300
            [FieldPeaSowingRule].Script.SowingDepth=20
    Simulation BaseSimulation3
      Clock: Start=1997-12-01; End=1998-07-01
      Summary summaryfile
      Weather: FileName=%root%\Examples\WeatherFiles\lincoln.met
      SoilArbitrator Soil Arbitrator
      Zone paddock: Area=1; Slope=0; AspectAngle=0; Altitude=50
        Soil: Latitude=0; Longitude=0
          Chemical
            Thickness  NO3N     NH4N  PH
            100        4.16667  0.1   6.6
            200        0        0     6.2
            300        0        0     5.7
            300        1.38889  0     5.5
            300        0        0     5.5
            300        0        0     5.5
          InitialWater Initial water: PercentMethod=1; FractionFull=1
          Physical: same as Lincoln1997.BaseSimulation.paddock.Soil.Physical
          WaterBalance SoilWater: same as Lincoln1997.BaseSimulation.paddock.Soil.SoilWater
          SoilNitrogen: same as Lincoln1997.BaseSimulation.paddock.Soil.SoilNitrogen
          Organic: FOMCNRatio=30
            Thickness  Carbon  SoilCNRatio  FBiom  FInert  FOM
            100        0.1     11.5         0.025  0.96    1243.93
            200        0.1     11.5         0.025  0.96    833.832
            300        0.1     11.5         0.015  0.96    457.617
            300        0.1     11.5         0.01   0.96    251.145
            300        0.1     11.5         0.01   0.96    137.831
            300        0.1     11.5         0.01   0.96    75.6435
          CERESSoilTemperature Temperature
        MicroClimate: a_interception=0; b_interception=1; c_interception=0; d_interception=0; soil_albedo=0.23; SoilHeatFluxFraction=0.4; MinimumHeightDiffForNewLayer=0; NightInterceptionFraction=0.5; ReferenceHeight=2
        Irrigation
        Fertiliser
        SurfaceOrganicMatter surface organic matter: InitialResidueName=wheat; InitialResidueType=wheat; InitialResidueMass=0; InitialStandingFraction=0; InitialCPR=0; InitialCNR=80
        Report: EventNames=[Clock].DoReport
          VariableNames:
            [Clock].Today
            [DiagnosticsVariables].Script.AccumDenit
            [DiagnosticsVariables].Script.AccumDetach
            [DiagnosticsVariables].Script.AccumDrainage
            [DiagnosticsVariables].Script.AccumEO
            [DiagnosticsVariables].Script.AccumEP
            [DiagnosticsVariables].Script.AccumES
            [DiagnosticsVariables].Script.AccumFert
            [DiagnosticsVariables].Script.AccumIrrigation
            [DiagnosticsVariables].Script.AccumLeach
            [DiagnosticsVariables].Script.AccumMineralisation
            [DiagnosticsVariables].Script.AccumOutflowLat
            [DiagnosticsVariables].Script.AccumPlantN
            [DiagnosticsVariables].Script.AccumRainfall
            [DiagnosticsVariables].Script.AccumRunoff
            [DiagnosticsVariables].Script.BiomN
            [DiagnosticsVariables].Script.DeltaSoilMineralN
            [DiagnosticsVariables].Script.DeltaSoilOMN
            [DiagnosticsVariables].Script.DeltaSurfaceOMN
            [DiagnosticsVariables].Script.DltNMinRes
            [DiagnosticsVariables].Script.DltNMinTot
            [DiagnosticsVariables].Script.DUL
            [DiagnosticsVariables].Script.FomN
            [DiagnosticsVariables].Script.HumN
            [DiagnosticsVariables].Script.OutFlowLat
            [DiagnosticsVariables].Script.SoilNitrogenContent
            [DiagnosticsVariables].Script.SoilWaterDeficit
            [DiagnosticsVariables].Script.SWC
            [FieldPea].Arbitrator.DM.TotalPlantDemand
            [FieldPea].Arbitrator.DM.TotalFixationSupply
            [FieldPea].Arbitrator.DM.Allocated
            [FieldPea].Arbitrator.DM.NutrientLimitation
            [FieldPea].Arbitrator.DM.SinkLimitation
            [FieldPea].Arbitrator.N.TotalPlantDemand
            [FieldPea].Leaf.AppearedCohortNo
            [FieldPea].Leaf.CoverDead
            [FieldPea].Leaf.CoverGreen
            [FieldPea].Leaf.CoverTotal
            [FieldPea].Leaf.Dead.N
            [FieldPea].Leaf.Dead.NConc
            [FieldPea].Leaf.Dead.Wt
            [FieldPea].Leaf.DeadCohortNo
            [FieldPea].Leaf.ExpandedCohortNo
            [FieldPea].Leaf.ExpandingCohortNo
            [FieldPea].Leaf.Fn
            [FieldPea].Leaf.Fw
            [FieldPea].Leaf.LAI
            [FieldPea].Leaf.LAIDead
            [FieldPea].Leaf.LeafCohortParameters.MaximumNConc
            [FieldPea].Leaf.LeafCohortParameters.MinimumNConc
            [FieldPea].Leaf.Live.N
            [FieldPea].Leaf.Live.NConc
            [FieldPea].Leaf.Live.Wt
            [FieldPea].Leaf.Photosynthesis.FT
            [FieldPea].Leaf.Photosynthesis.FVPD
            [FieldPea].Leaf.PlantAppearedGreenLeafNo
            [FieldPea].Leaf.SenescingCohortNo
            [FieldPea].Leaf.SpecificArea
            [FieldPea].Leaf.Transpiration
            [FieldPea].Leaf.WaterDemand
            [FieldPea].Nodule.NFixed
            [FieldPea].Nodule.RespiredWt
            [FieldPea].Nodule.Dead.N
            [FieldPea].Nodule.Dead.NConc
            [FieldPea].Nodule.Dead.Wt
            [FieldPea].Nodule.Live.N
            [FieldPea].Nodule.Live.NConc
            [FieldPea].Nodule.Live.StorageWt
            [FieldPea].Nodule.Live.StructuralWt
            [FieldPea].Nodule.Live.Wt
            [FieldPea].Nodule.MaximumNConc
            [FieldPea].Nodule.MinimumNConc
            [FieldPea].Phenology.CurrentPhase.Name
            [FieldPea].Phenology.Stage
            [FieldPea].Root.Dead.N
            [FieldPea].Root.Dead.NConc
            [FieldPea].Root.Dead.Wt
            [FieldPea].Root.Depth
            [FieldPea].Root.Live.N
            [FieldPea].Root.Live.NConc
            [FieldPea].Root.Live.Wt
            [FieldPea].Root.MaximumNConc
            [FieldPea].Root.MinimumNConc
            [FieldPea].Root.NDemand
            [FieldPea].Root.NTakenUp
            [FieldPea].Root.NUptake
            [FieldPea].Root.Allocated.N
            [FieldPea].Root.WaterUptake
            [FieldPea].Stem.Dead.N
            [FieldPea].Stem.Dead.NConc
            [FieldPea].Stem.Dead.Wt
            [FieldPea].Stem.Live.N
            [FieldPea].Stem.Live.NConc
            [FieldPea].Stem.Live.StorageWt
            [FieldPea].Stem.Live.StructuralWt
            [FieldPea].Stem.Live.Wt
            [FieldPea].Stem.MaximumNConc
            [FieldPea].Stem.MinimumNConc
            [FieldPea].Shell.Dead.N
            [FieldPea].Shell.Dead.NConc
            [FieldPea].Shell.Dead.Wt
            [FieldPea].Shell.Live.N
            [FieldPea].Shell.Live.NConc
            [FieldPea].Shell.Live.StorageWt
            [FieldPea].Shell.Live.StructuralWt
            [FieldPea].Shell.Live.Wt
            [FieldPea].Shell.MaximumNConc
            [FieldPea].Shell.MinimumNConc
            [FieldPea].Structure.Height
            [FieldPea].Structure.LeafTipsAppeared
            [FieldPea].Structure.PlantTotalNodeNo
            [FieldPea].Structure.PrimaryBudTotalNodeNo
            [FieldPea].Structure.TotalStemPopn
            [FieldPea].AboveGround.N
            [FieldPea].BelowGround.N
            [FieldPea].BelowGround.Wt
            [FieldPea].AboveGround.Wt
            [FieldPea].Total.N
            [FieldPea].Total.Wt
            [FieldPea].TotalDead.N
            [FieldPea].TotalDead.Wt
            [FieldPea].TotalLive.N
            [FieldPea].TotalLive.Wt
            [FieldPea].Grain.Dead.N
            [FieldPea].Grain.Dead.NConc
            [FieldPea].Grain.Dead.Wt
            [FieldPea].Grain.Live.N
            [FieldPea].Grain.Live.NConc
            [FieldPea].Grain.Live.Wt
            [FieldPea].Grain.LiveFWt
            [FieldPea].Grain.MaximumNConc
            [FieldPea].Grain.MinimumNConc
            [FieldPeaHarvestRule].Script.FinalTag
            [Soil].SoilNitrogen.NO3.kgha
            [Soil].SoilWater.Drainage
            [Soil].SoilWater.Eo
            [Soil].SoilWater.Es
            [Soil].SoilWater.pond
            [Soil].SoilWater.Runoff
            [Soil].SoilWater.SWmm
            [FieldPea].Stem.Live.StorageWt
        Manager FieldPeaSowingRule
          SowingFert = 300
          SowingDepth = 20
          RowSpacing = 150
          SowingRate = 50
          CultivarName = Primo
          SowingDate = 1997-12-23
```csharp
using Models;
using APSIM.Shared.Utilities;
using Models.PMF;
using Models.Core;
using System;
        
        namespace Models
        {
           [Serializable] 
           [System.Xml.Serialization.XmlInclude(typeof(Model))]
            public class Script : Model
            {      
               [Link] Plant FieldPea;
               [Link] Clock Clock;
               [Link] Fertiliser Fert;

               [Description("Spacing (mm) between rows")]
               public double RowSpacing { get; set; }
               [Description("Depth (mm) Grains are planted")]
               public double SowingDepth { get; set; }
               [Description("Seeds sown (/m2)")]
               public double SowingRate { get; set; }
               [Description("Cultivar")]
               [Display(Type=DisplayType.CultivarName)]
               public string CultivarName { get; set; }
               [Description("Sowing Date")]
               public DateTime SowingDate { get; set; }
               [Description("Sowing Fert")]
               public double SowingFert { get; set; }

               [EventSubscribe("DoManagement")]
               private void OnDoManagement(object sender, EventArgs e)
               {
                if (Clock.Today.Date == SowingDate)
                    {
                    FieldPea.Sow(population:SowingRate, cultivar:CultivarName, depth:SowingDepth, rowSpacing:RowSpacing, budNumber:1);
                    Fert.Apply(SowingFert, Fertiliser.Types.UreaN,0);
                    }
                //FieldPea.Sow(... Contains the following arguements:
                //Population  double  Required  Seeds sowing/m2
                //Cultivar    string  Required  "NameOfCultivar"
                //Depth       double  Optional  Depth (mm) seed sown.   Default is 100mm 
                //MaxCover    double  Optional  Proportion (0-1) of the ground row crop will cover.   Default is 1.0
                //BudNumber   double  Optional  Number of mainstems per seed sown.  Default is 1.0
                //RowSpacing  double  Optional  Spaceing (mm) between drill rows when crop is sown.  Default is 150mm
                //CropClass   string  Optional  Crop class to instantiate when crop is sown.  Default is "Plant"
               }
            }
        }
```
        Manager FieldPeaHarvestRule
          script: same as in Lincoln1997.BaseSimulation.paddock.FieldPeaHarvestRule
        Operations: same as Lincoln1997.BaseSimulation.paddock.Operations
        Folder DiagnoisticGraphs
          Manager DiagnosticsVariables
```csharp
using Models.Climate;
using APSIM.Shared.Utilities;
using System.Xml.Serialization;
using Models;
using Models.PMF;
using Models.Soils;
using System.Text;
using System.Collections.Generic;
using Models.Core;
using System;
using Models.Interfaces;
using Models.Soils.Nutrients;
using Models.PMF.Organs;

namespace Models
{
    [Serializable] 
    public class Script : Model
    {      
        [Link] private Clock Clock;
        [Link] private Weather Met;
        [Link] private Fertiliser Fert;
        [Link] private Irrigation Irrig;
        [Link] private Plant FieldPea;
        [Link] private Zone zone;
        [Link(ByName = true)]
        private ISolute Urea;
        [Link(ByName = true)]
        private ISolute NO3;
        [Link(ByName = true)]
        private ISolute NH4;
        [Link(ByName = true)]
        private SoilNitrogen SoilNitrogen;
        [Link] private Soils.Soil Soil;
        [Link] private Models.Surface.SurfaceOrganicMatter SOM;
        [Link(Type = LinkType.Path, Path = "[FieldPea].Root")]
        private Root root;
        [Link]
        private IPhysical soilPhysical;
        [Link]
        private ISoilWater waterBalance;
                    
        [XmlIgnore] public bool InitialDay { get; set; }
        
        [XmlIgnore] public double AccumPlantN { get; set; }
        [XmlIgnore] public double AccumMineralisation { get; set; }
        [XmlIgnore] public double AccumDenit { get; set; }
        [XmlIgnore] public double AccumFert { get; set; }
        [XmlIgnore] public double AccumLeach { get; set; }
        [XmlIgnore] public double AccumDetach { get; set; }
        [XmlIgnore] public double DeltaSoilOMN { get; set; }
        [XmlIgnore] public double DeltaSurfaceOMN { get; set; }
        [XmlIgnore] public double DeltaSoilMineralN { get; set; }
        [XmlIgnore] public double SoilNitrogenContent { get; set; }
        
        [XmlIgnore] public double AccumEO { get; set; }
        [XmlIgnore] public double AccumEP { get; set; }
        [XmlIgnore] public double AccumES { get; set; }
        [XmlIgnore] public double AccumDrainage { get; set; }
        [XmlIgnore] public double AccumRunoff { get; set; }
        [XmlIgnore] public double AccumOutflowLat { get; set; }
        [XmlIgnore] public double AccumIrrigation { get; set; }
        [XmlIgnore] public double AccumRainfall { get; set; }
        [XmlIgnore] public double SoilWaterDeficit { get; set; }
        
        [XmlIgnore] public double  InitialSoilOMN { get; set; }
        [XmlIgnore] public double  InitialSurfaceOMN { get; set; }
        [XmlIgnore] public double  InitialMineralN { get; set; }
        
        [XmlIgnore] public double SWC { get; set; }
        [XmlIgnore] public double DUL { get; set; }
        [XmlIgnore] public double OutFlowLat { get; set; }

        [XmlIgnore] public double FomN { get; set; }
        [XmlIgnore] public double BiomN { get; set; }
        [XmlIgnore] public double HumN { get; set; }
        [XmlIgnore] public double OrganicN { get; set; }
        [XmlIgnore] public double NO3N { get; set; }
        [XmlIgnore] public double NH4N { get; set; }
        [XmlIgnore] public double UreaN { get; set; }
        [XmlIgnore] public double MineralN { get; set; }
        [XmlIgnore] public double DltNMinRes { get; set; }
        [XmlIgnore] public double DltNMinTot { get; set; }
        [XmlIgnore] public double NonStructuralDM {get; set;}
        
        [EventSubscribe("StartOfSimulation")]
        private void OnSimulationCommencing(object sender, EventArgs e)
        {
            InitialDay = true;
        }       
        
        [EventSubscribe("DoManagement")]
        private void OnDoManagement(object sender, EventArgs e)
        {
            //!!!!!! Nitrogen balance components !!!!!!
            //!!!!!!^^^^^^^^^^^^^^^^^^^^^^^^^^^^^!!!!!!
               FomN = MathUtilities.Sum(SoilNitrogen.FOMN);
            HumN = MathUtilities.Sum(SoilNitrogen.HumicN);
            BiomN = MathUtilities.Sum(SoilNitrogen.MicrobialN);
            OrganicN = FomN + HumN + BiomN;
            NO3N = MathUtilities.Sum(NO3.kgha);
            NH4N = MathUtilities.Sum(NH4.kgha);
            UreaN = MathUtilities.Sum(Urea.kgha);
            MineralN = NO3N + NH4N + UreaN; 
            DltNMinRes = MathUtilities.Sum(SoilNitrogen.dlt_n_min_res);
            DltNMinTot = MathUtilities.Sum(SoilNitrogen.MineralisedN);
            int layers = soilPhysical.Thickness.Length;
            if (InitialDay == true)
            {
                InitialSurfaceOMN = SOM.N;
                InitialSoilOMN = OrganicN;
                InitialMineralN = MineralN;
                InitialDay = false;
            }
            AccumFert += Fert.NitrogenApplied;
            DeltaSurfaceOMN = SOM.N - InitialSurfaceOMN;
            AccumLeach = AccumLeach - waterBalance.LeachNH4 - waterBalance.LeachNO3 - waterBalance.LeachUrea; //Fails
            AccumMineralisation += MathUtilities.Sum(SoilNitrogen.MineralisedN);
            AccumDenit -= MathUtilities.Sum(SoilNitrogen.Denitrification);
            AccumPlantN -= (double)zone.Get("FieldPea.Root.NUptake");
            DeltaSoilOMN = OrganicN - InitialSoilOMN;
            DeltaSoilMineralN = MineralN - InitialMineralN;
            SoilNitrogenContent = MineralN;
            
            //!!!!!! Water balance components !!!!!!
            //!!!!!!^^^^^^^^^^^^^^^^^^^^^^^^^^!!!!!!

            AccumIrrigation += Irrig.IrrigationApplied;
            AccumRainfall += Met.Rain;
            AccumEP -= (double)zone.Get("FieldPea.Leaf.Transpiration");
            SoilWaterDeficit =  (SWC - DUL);
            double OutFlowLat = MathUtilities.Sum(waterBalance.LateralOutflow);
            AccumOutflowLat -= OutFlowLat;

        }
        
        [EventSubscribe("DoManagementCalculations")]
        private void OnDoManagementCalculations(object sender, EventArgs e)
        {
            FomN = MathUtilities.Sum(SoilNitrogen.FOMN);
            HumN = MathUtilities.Sum(SoilNitrogen.HumicN);
            BiomN = MathUtilities.Sum(SoilNitrogen.MicrobialN);
            
            
            AccumEO -= waterBalance.Eo;
            AccumES -= waterBalance.Es; 
            AccumDrainage -= waterBalance.Drainage;
            AccumRunoff -= waterBalance.Runoff;
            SWC = MathUtilities.Sum(waterBalance.SWmm);
            DUL = MathUtilities.Sum(soilPhysical.DULmm);
            
            NonStructuralDM = (double)zone.Get("FieldPea.Leaf.Live.StorageWt") + (double)zone.Get("FieldPea.Stem.Live.StorageWt") + (double)zone.Get("FieldPea.Root.Live.StorageWt") + (double)zone.Get("FieldPea.Nodule.Live.StorageWt") + (double)zone.Get("FieldPea.Shell.Live.StorageWt") + (double)zone.Get("FieldPea.Grain.Live.StorageWt");
        }
    }
}
```
        Plant FieldPea
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