Simulations: Version=159
  Memo TitlePage
    # The APSIM Canola Model
  DataStore
    ExcelInput: FileNames=[Observed.xlsx]; SheetNames=[Observed]
    PredictedObserved PredictedObservedDaily: PredictedTableName=DailyReport; ObservedTableName=Observed; FieldNameUsedForMatch=SimulationName; FieldName2UsedForMatch=Clock.Today; AllColumns=true
    Probability WaggaCDF: TableName=WaggaHarvestReport; Exceedence=false; FieldToSplitOn=SimulationName
  Folder Replacements
    Report DailyReport: EventNames=[Clock].DoReport
      VariableNames:
        [Clock].Today
        [Clock].Today.Year
        [ForageBrassica].DaysAfterSowing
        [ForageBrassica].Phenology.CurrentStageName
        [ForageBrassica].Leaf.NodeNumber
        [ForageBrassica].SowingData.Cultivar
        [ForageBrassica].Phenology.CurrentStageName
        [ForageBrassica].Phenology.Stage
        [ForageBrassica].Phenology.Photoperiod
        [ForageBrassica].Phenology.StemElongation.Target.PPResponse
        [Weather].MeanT
        sum([Soil].Water.MM) as ProfileWater
        sum([Soil].SoilWater.ESW) as ProfileESW
        sum([Soil].NO3.kgha) as TotalSoilNitrogen
        [ForageBrassica].AboveGround.Wt
        [ForageBrassica].AboveGroundLive.Wt
        [ForageBrassica].AboveGround.N
        [ForageBrassica].AboveGroundLive.N
        [ForageBrassica].Grain.Wt
        [ForageBrassica].Grain.Live.Wt
        [ForageBrassica].Grain.N
        [ForageBrassica].Grain.NConc
        [ForageBrassica].Grain.Number
        [ForageBrassica].CoverTotal
        [ForageBrassica].Leaf.CoverTotal
        [ForageBrassica].Leaf.LAI
        [ForageBrassica].Leaf.Live.Wt
        [ForageBrassica].Leaf.Wt
        [ForageBrassica].Leaf.Live.N
        [ForageBrassica].Leaf.Live.NConc
        [ForageBrassica].Leaf.Dead.Wt
        [ForageBrassica].Leaf.Dead.N
        [ForageBrassica].Leaf.Dead.N
        [ForageBrassica].Leaf.BranchNumber
        [ForageBrassica].Leaf.Fw
        [ForageBrassica].Leaf.Fn
        [ForageBrassica].Leaf.FNmetabolic
        [ForageBrassica].Pod.Wt
        [ForageBrassica].Pod.N
        [ForageBrassica].Pod.NConc
        [ForageBrassica].Root.Depth
        [ForageBrassica].Root.N
        [ForageBrassica].Root.Wt
        [ForageBrassica].Root.Nconc
        [ForageBrassica].Root.WaterUptake
        [ForageBrassica].Stem.N
        [ForageBrassica].Stem.NConc
        [ForageBrassica].Stem.Wt
        [ForageBrassica].Stem.Live.StorageWt
        [ForageBrassica].Shell.Wt
        [ForageBrassica].Shell.N
        [ForageBrassica].Leaf.Height
        [SurfaceOrganicMatter].Wt
        [ForageBrassica].Arbitrator.DM.TotalPlantDemand
        [ForageBrassica].Phenology.CumulativeVernalTime
        [ForageBrassica].Leaf.FinalLeafNumber
        [ForageBrassica].Root.NUptake
    Report HarvestReport: EventNames=[ForageBrassica].Harvesting
      VariableNames:
        [Clock].Today
        [ForageBrassica].SowingDate
        [ForageBrassica].SowingData.Cultivar
        [ForageBrassica].Phenology.CurrentStageName
        [ForageBrassica].Phenology.EmergenceDAS
        [ForageBrassica].Phenology.FloralInitiationDAS
        [ForageBrassica].Phenology.GreenBudDAS
        [ForageBrassica].Phenology.StartFloweringDAS
        [ForageBrassica].Phenology.CumulativeVernalTime
        [ForageBrassica].Grain.Wt
        [ForageBrassica].AboveGroundLive.Wt
        [ForageBrassica].AboveGround.Wt
        sum([Soil].Water.MM) as ProfileWater
        sum([Soil].NO3.kgha) as TotalSoilNitrogen
        [ForageBrassica].Phenology.MaturityDAS
        [Clock].Today.Year
        [ForageBrassica].DaysAfterSowing
    Report DailyBiomass: EventNames=[Clock].DoReport
      VariableNames:
        [Clock].Today
        [Canola].AboveGround.Wt
        [Canola].AboveGroundLive.Wt
        [Canola].Population
        [Canola].AboveGround.NConc
        [Canola].Grain.Wt
        [Canola].Grain.Size
        [Canola].Grain.Total.Wt
        [Canola].Grain.N
        [Canola].Grain.Nconc
        [Canola].Grain.Number
        [Canola].LAI
        [Canola].Stem.Live.Wt
        [Canola].Leaf.Live.Wt
        [Canola].Stem.Wt
        [Canola].Leaf.Wt
        [Canola].Phenology.CurrentStageName
        [Canola].Phenology.Stage
    Manager Harvesting
```csharp
using Models.PMF.Phen;
using System;
using Models.Core;
using System.Collections.Generic;
using System.Text;
using Models.Soils;
using Models.PMF;
using Models;
using System.Xml.Serialization;
using APSIM.Shared.Utilities;

namespace Models
{
    [Serializable] 
    public class Script : Model
    {
        [Link] private Plant Canola;
        [Link] private Clock Clock;
        [Link(Type = LinkType.Path, Path = "[Canola].Phenology")]
        private Phenology phenology;

        [EventSubscribe("DoManagement")]
        private void OnDoManagement(object sender, EventArgs e)
        {
            if ((phenology.CurrentPhase.Name == "ReadyForHarvesting")||(Canola.IsAlive&&DateUtilities.DatesEqual("31-Dec", Clock.Today)))
            {
                Canola.Harvest();
                Canola.EndCrop();
            }
        }
    }
}
```
    Report DailyReport_DP: EventNames=[Clock].DoReport
      VariableNames:
        [Clock].Today
        [Canola].SowingData.Cultivar
        [Canola].Phenology.CurrentStageName
        [Canola].Phenology.Stage
        [Weather].MeanT
        sum([Soil].Water.MM) as ProfileWater
        sum([Soil].NO3.kgha) as TotalSoilNitrogen
        [Canola].AboveGround.Wt
        [Canola].AboveGroundLive.Wt
        [Canola].AboveGround.N
        [Canola].AboveGroundLive.N
        [Canola].AboveGroundLive.N*10 as UptakeNKgHA
        [canola].Grain.Wt
        [Canola].Grain.Live.Wt
        [Canola].Grain.N
        [Canola].Grain.NConc
        [Canola].Grain.Number
        [Canola].Grain.Size
        [Canola].Leaf.LAI
        [canola].Leaf.Live.Wt
        [canola].Leaf.Wt
        [canola].Leaf.SpecificArea
        [Canola].Leaf.Live.N
        [Canola].Leaf.Live.NConc
        [Canola].Leaf.Dead.Wt
        [Canola].Leaf.Dead.N
        [Canola].Leaf.Dead.NConc
        [canola].Pod.NConc
        [Canola].Root.Depth
        [Canola].Root.N
        [Canola].Root.Wt
        [Canola].Root.Nconc
        [Canola].Root.WaterUptake
        [Canola].Stem.N
        [Canola].Stem.NConc
        [Canola].Stem.Wt
        [Canola].Stem.Live.StorageWt
        [Canola].Structure.Height
        [SurfaceOrganicMatter].Wt
        [Clock].Today.Year
        [Canola].Leaf.DeadCohortNo
        [Canola].Leaf.GreenCohortNo
        [Canola].Leaf.SenescingCohortNo
        [Canola].Leaf.ExpandedCohortNo
    Report HarvestReport_DP: EventNames=[Canola].Harvesting
      VariableNames:
        [Clock].Today
        [Canola].SowingData.Cultivar
        [Canola].AboveGroundLive.Wt
        [Canola].Grain.Wt
        [Canola].Phenology.CurrentStageName
        sum([Soil].Water.MM) as ProfileWater
        sum([Soil].NO3.kgha) as TotalSoilNitrogen
        [Canola].Phenology.MaturityDAS
        [Clock].Today.Year
    Report SowingReport: EventNames=[Canola].Sowing
      VariableNames:
        [Clock].Today
        [Canola].SowingData.Cultivar
        [IWeather].Latitude
        [IWeather].Longitude
    Plant CanolaFull: PlantType=Canola; IsEnding=false; DaysAfterEnding=0
      OrganArbitrator Arbitrator
        BiomassTypeArbitrator DMArbitration
          Folder PotentialPartitioningMethods
            ReallocationMethod
            AllocateFixationMethod
            RetranslocationMethod
            SendPotentialDMAllocationsMethod
          Folder AllocationMethods
            NutrientConstrainedAllocationMethod
            DryMatterAllocationsMethod
          RelativeAllocation ArbitrationMethod
        BiomassTypeArbitrator NArbitration
          Folder PotentialPartitioningMethods
            ReallocationMethod
          Folder ActualPartitioningMethods
            AllocateFixationMethod
            RetranslocationMethod
          Folder AllocationMethods
            NitrogenAllocationsMethod
          RelativeAllocation ArbitrationMethod
          AllocateUptakesMethod
        WaterUptakeMethod
        NitrogenUptakeMethod
      Phenology
        HourlyInterpolation ThermalTime: agregationMethod=0
          XYPairs Response: X=[2, 30, 35]; Y=[0, 28, 0]
          ThreeHourSin InterpolationMethod
        MultiplyFunction PPModifiedThermalTime
          VariableReference ThermalTime: VariableName=[Phenology].ThermalTime
          LinearInterpolationFunction PhotoperiodModifier
            XYPairs: X=[12, 16]; Y=[1, 1]
            VariableReference XValue: VariableName=[Phenology].Photoperiod
        AccumulateFunction CumulativeThermalTime: StartStageName=Germination; EndStageName=FloralInitiation; FractionRemovedOnCut=0; FractionRemovedOnHarvest=0; FractionRemovedOnGraze=0; FractionRemovedOnPrune=0
          VariableReference DailyValue: VariableName=[Phenology].ThermalTime
        HourlyInterpolation VernalTime: agregationMethod=0
          XYPairs Response: X=[0, 2, 8, 15]; Y=[0, 1, 0.5, 0]
          ThreeHourSin InterpolationMethod
        AccumulateFunction CumulativeVernalTime: StartStageName=Germination; EndStageName=FloralInitiation; FractionRemovedOnCut=0; FractionRemovedOnHarvest=0; FractionRemovedOnGraze=0; FractionRemovedOnPrune=0
          VariableReference DailyValue: VariableName=[Phenology].VernalTime
        PhotoperiodFunction Photoperiod: Twilight=-6; DayLength=0
        GerminatingPhase Germinating: Start=Sowing; End=Germination
        EmergingPhase Emerging: Start=Germination; End=Emergence; TTForTimeStep=0
          VariableReference ThermalTime: VariableName=[Phenology].ThermalTime
          AddFunction Target
            Constant ShootLag: FixedValue=15
            MultiplyFunction DepthxRate
              VariableReference SowingDepth: VariableName=[Plant].SowingData.Depth
              Constant ShootRate: FixedValue=5
        GenericPhase Vegetative: Start=Emergence; End=FloralInitiation
          VariableReference Progression: VariableName=[Phenology].ThermalTime
          LinearInterpolationFunction Target
            XYPairs: X=[0, 25]; Y=[290, 1]
            VariableReference XValue: VariableName=[Phenology].CumulativeVernalTime
        SimpleLeafAppearancePhase BudDevelopment: Start=FloralInitiation; End=GreenBud
          VariableReference TargetLeafNumber: VariableName=[Leaf].FinalLeafNumber
          VariableReference CurrentLeafNumber: VariableName=[Leaf].NodeNumber
        GenericPhase StemElongation: Start=GreenBud; End=StartFlowering
          VariableReference Progression: VariableName=[Phenology].PPModifiedThermalTime
          AddFunction Target
            Constant Base: FixedValue=250
            MultiplyFunction PPResponse
              Constant Amount: FixedValue=0
              LinearInterpolationFunction Shape
                XYPairs: X=[13, 14]; Y=[1, 0]
                VariableReference XValue: VariableName=[Phenology].Photoperiod
        GenericPhase EarlyFlowering: Start=StartFlowering; End=StartPodDevelopment
          Memo
            The duration of the grain filling phase has been taken from the model of Robertson et al (2002).
          Constant Target: FixedValue=100
          VariableReference Progression: VariableName=[Phenology].ThermalTime
        GenericPhase EarlyPodDevelopment: Start=StartPodDevelopment; End=StartGrainFilling
          Memo
            The duration of the grain filling phase has been taken from the model of Robertson et al (2002).
          Constant Target: FixedValue=140
          VariableReference Progression: VariableName=[Phenology].ThermalTime
          VariableReference Stress: VariableName=[Phenology].Vegetative.PhotoperiodEffect
        GenericPhase EarlyGrainFilling: Start=StartGrainFilling; End=EndFlowering
          VariableReference Progression: VariableName=[Phenology].ThermalTime
          VariableReference Stress: VariableName=[Phenology].Vegetative.PhotoperiodEffect
          MultiplyFunction Target
            Constant FractionofGrainfilling: FixedValue=0.05
            VariableReference EntireGrainfilling
              VariableName=[Phenology].LateGrainFilling.Target.EntireGrainfillPeriod.FixedValue
        GenericPhase MidGrainFilling: Start=EndFlowering; End=EndPodDevelopment
          VariableReference Progression: VariableName=[Phenology].ThermalTime
          VariableReference Stress: VariableName=[Phenology].Vegetative.PhotoperiodEffect
          MultiplyFunction Target
            Constant FractionofMidToLateGrainfilling: FixedValue=0.5
            SubtractFunction
              VariableReference EntireGrainfilling
                VariableName=[Phenology].LateGrainFilling.Target.EntireGrainfillPeriod.FixedValue
              VariableReference EarlyGrainfilling: VariableName=[Phenology].EarlyGrainFilling.Target
        GenericPhase LateGrainFilling: Start=EndPodDevelopment; End=EndGrainFill
          SubtractFunction Target
            Constant EntireGrainfillPeriod: FixedValue=700
            VariableReference EarlyGrainFillingTarget: VariableName=[Phenology].EarlyGrainFilling.Target
            VariableReference MidGrainFillingTarget: VariableName=[Phenology].MidGrainFilling.Target
          VariableReference Progression: VariableName=[Phenology].ThermalTime
          VariableReference Stress: VariableName=[Phenology].Vegetative.PhotoperiodEffect
        GenericPhase Maturing: Start=EndGrainFill; End=Maturity
          Constant Target: FixedValue=5
          VariableReference Progression: VariableName=[Phenology].ThermalTime
        GenericPhase Ripening: Start=Maturity; End=HarvestRipe
          Constant Target: FixedValue=1
          VariableReference Progression: VariableName=[Phenology].ThermalTime
        EndPhase ReadyForHarvesting: Start=HarvestRipe; End=Unused
          VariableReference ThermalTime: VariableName=[Phenology].ThermalTime
        OnEventFunction EmergenceDAS: SetEvent=Emergence; ReSetEvent=never
          Memo
            A function is used to provide maturity date as days after sowing(DAS).
          Constant PreEventValue: FixedValue=0
          VariableReference PostEventValue: VariableName=[Plant].DaysAfterSowing
        OnEventFunction FloralInitiationDAS: SetEvent=FloralInitiation; ReSetEvent=never
          Memo
            A function is used to provide flowering date as days after sowing(DAS).
          Constant PreEventValue: FixedValue=0
          VariableReference PostEventValue: VariableName=[Plant].DaysAfterSowing
        OnEventFunction GreenBudDAS: SetEvent=GreenBud; ReSetEvent=never
          Memo
            A function is used to provide flowering date as days after sowing(DAS).
          Constant PreEventValue: FixedValue=0
          VariableReference PostEventValue: VariableName=[Plant].DaysAfterSowing
        OnEventFunction StartFloweringDAS: SetEvent=StartFlowering; ReSetEvent=never
          Memo
            A function is used to provide flowering date as days after sowing(DAS).
          Constant PreEventValue: FixedValue=0
          VariableReference PostEventValue: VariableName=[Plant].DaysAfterSowing
        OnEventFunction MaturityDAS: SetEvent=Maturity; ReSetEvent=never
          Memo
            A function is used to provide maturity date as days after sowing(DAS).
          Constant PreEventValue: FixedValue=0
          VariableReference PostEventValue: VariableName=[Plant].DaysAfterSowing
      Root: GrowthRespiration=0; MaintenanceRespiration=0
        RootShapeCylinder RootShape
        LinearInterpolationFunction KLModifier
          XYPairs: X=[0, 3]; Y=[1, 1]
          VariableReference XValue: VariableName=[Leaf].LAI
        HourlyInterpolation TemperatureEffect: agregationMethod=0
          XYPairs Response: X=[0, 20, 32]; Y=[0, 1, 0]
          ThreeHourSin InterpolationMethod
        Constant MaxDailyNUptake: FixedValue=6
        Constant SenescenceRate: FixedValue=0.005
        Constant MaximumRootDepth: FixedValue=1000000
        PhaseLookup RootFrontVelocity
          PhaseLookupValue PreEmergence: Start=Germination; End=Emergence
            Constant Function: FixedValue=5
          PhaseLookupValue early: Start=Emergence; End=StartGrainFilling
            Constant Function: FixedValue=44
          PhaseLookupValue late: Start=StartGrainFilling; End=Maturity
            Constant Function: FixedValue=0
        Constant MaximumNConc: FixedValue=0.01
        Constant MinimumNConc: FixedValue=0.005
        PhaseLookupValue NitrogenDemandSwitch: Start=Emergence; End=EndGrainFill
          Constant: FixedValue=1
        LinearInterpolationFunction KNO3
          XYPairs: X=[0, 0.003]; Y=[0.01, 0.01]
          VariableReference XValue: VariableName=[Root].LengthDensity
        LinearInterpolationFunction KNH4
          XYPairs: X=[0, 0.003]; Y=[0, 0]
          VariableReference XValue: VariableName=[Root].LengthDensity
        BiomassRemoval BiomassRemovalDefaults
          OrganBiomassRemovalType Harvest: FractionLiveToRemove=0; FractionDeadToRemove=0; FractionLiveToResidue=0.2; FractionDeadToResidue=0
          OrganBiomassRemovalType Cut: FractionLiveToRemove=0; FractionDeadToRemove=0; FractionLiveToResidue=0.3; FractionDeadToResidue=0
          OrganBiomassRemovalType Prune: FractionLiveToRemove=0; FractionDeadToRemove=0; FractionLiveToResidue=0.1; FractionDeadToResidue=0
        LinearInterpolationFunction NUptakeSWFactor
          XYPairs: X=[0, 1]; Y=[0, 1]
          VariableReference XValue: VariableName=[Root].RWC
        Constant SpecificRootLength: FixedValue=40; Units=m/g
        Constant DMConversionEfficiency: FixedValue=1
        Constant MaintenanceRespirationFunction: FixedValue=1
        Constant RemobilisationCost: FixedValue=0
        Constant CarbonConcentration: FixedValue=0.4
        NutrientDemandFunctions DMDemands
          MultiplyFunction Structural
            PartitionFractionDemandFunction DMDemandFunction
              PhaseLookup PartitionFraction
                PhaseLookupValue Early: Start=Emergence; End=StartFlowering
                  Constant Function: FixedValue=0.2
                PhaseLookupValue Middle: Start=StartFlowering; End=StartGrainFilling
                  Constant Function: FixedValue=0.1
                PhaseLookupValue Late: Start=StartGrainFilling; End=Maturity
                  Constant Function: FixedValue=0
            Constant StructuralFraction: FixedValue=1
          Constant Metabolic: FixedValue=0
          StorageDMDemandFunction Storage
            SubtractFunction StorageFraction
              Constant One: FixedValue=1
              VariableReference StructuralFraction: VariableName=[Root].DMDemands.Structural.StructuralFraction
          Constant QStructuralPriority: FixedValue=1
          Constant QMetabolicPriority: FixedValue=1
          Constant QStoragePriority: FixedValue=1
        NutrientDemandFunctions NDemands
          MultiplyFunction Structural
            VariableReference MinNconc: VariableName=[Root].minimumNconc
            VariableReference PotentialDMAllocation: VariableName=[Root].potentialDMAllocation.Structural
          MultiplyFunction Metabolic
            SubtractFunction MetabolicNconc
              VariableReference CritNconc: VariableName=[Root].criticalNConc
              VariableReference MinNconc: VariableName=[Root].minimumNconc
            VariableReference PotentialDMAllocation: VariableName=[Root].potentialDMAllocation.Structural
          StorageNDemandFunction Storage
            VariableReference NitrogenDemandSwitch: VariableName=[Root].nitrogenDemandSwitch
            VariableReference MaxNconc: VariableName=[Root].maximumNconc
          Constant QStructuralPriority: FixedValue=1
          Constant QMetabolicPriority: FixedValue=1
          Constant QStoragePriority: FixedValue=1
        VariableReference CriticalNConc: VariableName=[Root].MinimumNConc
        NutrientPoolFunctions InitialWt
          Constant Structural: FixedValue=0.2; Units=g/plant
          Constant Metabolic: FixedValue=0
          Constant Storage: FixedValue=0
        Constant RootDepthStressFactor: FixedValue=1
      SimpleLeaf Leaf: Albedo=0.25; Gsmax350=0.015; R50=150; LeafInitialisationStage=Emergence; Height=0; BaseHeight=0; Width=0; FRGR=0; PotentialEP=0; WaterDemand=0; KDead=0.3; LAIDead=0
        PhaseLookup ThermalTime
          PhaseLookupValue Vegetative: Start=Sowing; End=FloralInitiation
            VariableReference Value: VariableName=[Phenology].ThermalTime
          PhaseLookupValue Reproductive: Start=FloralInitiation; End=StartFlowering
            VariableReference Value: VariableName=[Phenology].PPModifiedThermalTime
        RUEModel Photosynthesis
          MultiplyFunction RUE
            Constant Potential: FixedValue=1.69
              Memo
                This approach is based upon the value used in [robertson_simulation_2002] increased to account for partitioning to roots.
            Constant TriazineToleranceModifier: FixedValue=1
          WeightedTemperatureFunction FT: MaximumTemperatureWeighting=0.75
            Memo
              This approach is based upon that used in Bell, WRight and Hammer (1992) Crop Sci
            XYPairs: X=[0, 10, 22, 30]; Y=[0, 1, 1, 0]
          LinearInterpolationFunction FVPD
            XYPairs: X=[0, 10, 50]; Y=[1, 1, 1]
            VariableReference XValue: VariableName=[Leaf].Photosynthesis.VPD
          LinearInterpolationFunction FN
            XYPairs: X=[0, 1, 1.5]; Y=[0, 1, 1]
            VariableReference XValue: VariableName=[Leaf].Fn
          LinearInterpolationFunction FW
            XYPairs: X=[0, 1]; Y=[0, 1]
            VariableReference XValue: VariableName=[Leaf].Fw
          RUECO2Function FCO2: PhotosyntheticPathway=C3
          VariableReference RadnInt: VariableName=[Leaf].RadiationIntercepted
        StomatalConductanceCO2Modifier
          VariableReference PhotosynthesisCO2Modifier: VariableName=[Leaf].Photosynthesis.FCO2
        MaximumFunction Area
          AddFunction Calculation
            MultiplyFunction Initial
              Constant AreaPerPlant: FixedValue=0.0005
              VariableReference Population: VariableName=[Canola].SowingData.Population
            SubtractFunction Change
              AccumulateAtEvent AreaGrowth: StartStageName=Emergence; EndStageName=StartFlowering; AccumulateEventName=[Clock].DoActualPlantGrowth
                MultiplyFunction DeltaArea
                  VariableReference DeltaMass: VariableName=[Leaf].Allocated.StructuralWt
                  VariableReference SLA: VariableName=[Leaf].SpecificArea
              AccumulateAtEvent AreaSenesced: StartStageName=Emergence; EndStageName=HarvestRipe; AccumulateEventName=[Clock].DoActualPlantGrowth
                MultiplyFunction DeltaArea
                  VariableReference DeltaSenesced: VariableName=[Leaf].Senesced.StructuralWt
                  VariableReference SLA: VariableName=[Leaf].SpecificAreaCanopy
              AccumulateAtEvent AreaRemoved: StartStageName=Emergence; EndStageName=HarvestRipe; AccumulateEventName=[Clock].DoReportCalculations
                MultiplyFunction DeltaArea
                  VariableReference DeltaRemoved: VariableName=[Leaf].Removed.StructuralWt
                  VariableReference SLA: VariableName=[Leaf].SpecificAreaCanopy
          Constant Zero: FixedValue=0
        MinimumFunction FRGR
          VariableReference RUE_FT: VariableName=[Leaf].Photosynthesis.FT
          MinimumFunction Others
            VariableReference RUE_FN: VariableName=[Leaf].Photosynthesis.FN
            VariableReference RUE_FVPD: VariableName=[Leaf].Photosynthesis.FVPD
        Constant ExtinctionCoefficient: FixedValue=0.6
        LinearInterpolationFunction Tallness
          XYPairs: X=[1, 2, 3, 4, 5, 6, 9]; Y=[0, 0, 50, 400, 700, 900, 1000]
          VariableReference XValue: VariableName=[Phenology].Stage
        AddFunction NodeNumber
          Constant Initial: FixedValue=0
          AccumulateFunction Change: StartStageName=Emergence; EndStageName=GreenBud; FractionRemovedOnCut=1; FractionRemovedOnHarvest=1; FractionRemovedOnGraze=1; FractionRemovedOnPrune=0
            DivideFunction DeltaNode
              VariableReference ThermalTime: VariableName=[Leaf].ThermalTime
              VariableReference Phyllochron: VariableName=[Leaf].Phyllochron
        AddFunction BranchNumber
          Constant One: FixedValue=1
          AccumulateFunction CumulativeBranching: StartStageName=Emergence; EndStageName=GreenBud; FractionRemovedOnCut=1; FractionRemovedOnHarvest=1; FractionRemovedOnGraze=1; FractionRemovedOnPrune=0
            MultiplyFunction DeltaBranch
              VariableReference DeltaNode: VariableName=[Leaf].NodeNumber.Change.DeltaNode
              VariableReference BranchingRate: VariableName=[Leaf].BranchingRate
              MaximumFunction CoverFactor
                LinearInterpolationFunction Factor
                  XYPairs: X=[0, 0.3, 0.35, 1]; Y=[1, 1, 0, 0]
                  VariableReference XValue: VariableName=[Leaf].CoverTotal
                Constant Zero: FixedValue=0
              LinearInterpolationFunction WaterFactor
                XYPairs: X=[0.8, 1]; Y=[0, 1]
                VariableReference XValue: VariableName=[Leaf].Fw
              WeightedTemperatureFunction TemperatureFactor: MaximumTemperatureWeighting=0.5
                Memo
                  This approach is based upon that used in Bell, WRight and Hammer (1992) Crop Sci
                XYPairs: X=[0, 12, 22, 30]; Y=[0, 1, 1, 0]
        AccumulateFunction Number: StartStageName=Emergence; EndStageName=GreenBud; FractionRemovedOnCut=1; FractionRemovedOnHarvest=1; FractionRemovedOnGraze=1; FractionRemovedOnPrune=0
          MultiplyFunction DailyNumberIncrease
            VariableReference DeltaNode: VariableName=[Leaf].NodeNumber.Change.DeltaNode
            VariableReference BranchNumber: VariableName=[Leaf].BranchNumber
            VariableReference PlantNumber: VariableName=[Canola].SowingData.Population
        Constant NReallocationFactor: FixedValue=0.5
          Memo
            This model assumes that all metabolic and storage N is available for reallocation from senescing leaves.
        PhaseLookup SenescenceRate
          PhaseLookupValue Vegetative: Start=Emergence; End=StartFlowering
            MaximumFunction Rate
              MultiplyFunction AgeSenescence
                LinearInterpolationFunction Multiplier
                  XYPairs: X=[9, 10]; Y=[0, 1]
                  VariableReference XValue: VariableName=[Leaf].NodeNumber
                DivideFunction LeavesPerDay
                  VariableReference ThermalTime: VariableName=[Leaf].ThermalTime
                  VariableReference Phyllochron: VariableName=[Leaf].Phyllochron
                  VariableReference NodeNumber: VariableName=[Leaf].NodeNumber
                Constant: FixedValue=0
              LinearInterpolationFunction ShadeSenescence
                XYPairs: X=[1, 5, 8]; Y=[0, 0, 0.03]
                VariableReference XValue: VariableName=[Leaf].LAI
          PhaseLookupValue Reproductive: Start=StartFlowering; End=EndPodDevelopment
            Memo
              Leaf senescence rate is calculated to ensure that all leaves are senesced by crop maturity.
            BoundFunction Rate
              DivideFunction Fraction
                VariableReference TT: VariableName=[Phenology].ThermalTime
                SubtractFunction TTRemaining
                  ExpressionFunction TTRequired
                    Expression=[Phenology].EarlyFlowering.Target + [Phenology].EarlyPodDevelopment.Target + [Phenology].EarlyGrainFilling.Target+[Phenology].MidGrainFilling.Target
                  ExpressionFunction TTComplete
                    Expression=[Phenology].EarlyFlowering.ProgressThroughPhase + [Phenology].EarlyPodDevelopment.ProgressThroughPhase + [Phenology].EarlyGrainFilling.ProgressThroughPhase+[Phenology].MidGrainFilling.ProgressThroughPhase
                Constant Modifier: FixedValue=1
              Constant Lower: FixedValue=0
              Constant Upper: FixedValue=1
          PhaseLookupValue Senescent: Start=EndPodDevelopment; End=HarvestRipe
            Memo
              Leaf senescence rate is calculated to ensure that all leaves are senesced by crop maturity.
            Constant Rate: FixedValue=0.1
        Constant DetachmentRate: FixedValue=0.05; Units=/d
        MultiplyFunction InitialWt
          Constant MassPerPlant: FixedValue=0.06
          VariableReference Population: VariableName=[Canola].SowingData.Population
        MultiplyFunction LAIDead
          VariableReference SLA: VariableName=[Leaf].SpecificAreaCanopy
          VariableReference LeafDeadWt: VariableName=[Leaf].Dead.Wt
        LinearInterpolationFunction MaximumNConc
          XYPairs: X=[1, 3, 8]; Y=[0.06, 0.035, 0.03]
          VariableReference XValue: VariableName=[Leaf].NodeNumber
        VariableReference CriticalNConc: VariableName=[Leaf].MaximumNConc
        Constant MinimumNConc: FixedValue=0.02
        Constant MaintenanceRespiration: FixedValue=0; Units=0-1
        Constant DMConversionEfficiency: FixedValue=1; Units=0-1
        BiomassRemoval BiomassRemovalDefaults
          OrganBiomassRemovalType Harvest: FractionLiveToRemove=0; FractionDeadToRemove=0; FractionLiveToResidue=1; FractionDeadToResidue=1
          OrganBiomassRemovalType Cut: FractionLiveToRemove=0; FractionDeadToRemove=0; FractionLiveToResidue=1; FractionDeadToResidue=1
        Constant NRetranslocationFactor: FixedValue=0.5
        Constant DMReallocationFactor: FixedValue=0
        Constant DMRetranslocationFactor: FixedValue=0.5
        Constant RemobilisationCost: FixedValue=0
        Constant CarbonConcentration: FixedValue=0.4
        NutrientDemandFunctions DMDemands
          DivideFunction Structural
            VariableReference DeltaLAI: VariableName=[Leaf].DeltaLAI
            VariableReference SLA: VariableName=[Leaf].SpecificArea
            Memo
              Growth in leaf area is used to calculate the leaf dry matter demand.  Note that leaf biomass is assumed to consist of entirely structural dry matter.
          Constant Storage: FixedValue=0
          Constant Metabolic: FixedValue=0
          Constant QStructuralPriority: FixedValue=1
          Constant QMetabolicPriority: FixedValue=1
          Constant QStoragePriority: FixedValue=1
        NutrientDemandFunctions NDemands
          MultiplyFunction Structural
            VariableReference MinNconc: VariableName=[Leaf].minimumNconc
            VariableReference PotentialDMAllocation: VariableName=[Leaf].potentialDMAllocation.Structural
          MultiplyFunction Metabolic
            SubtractFunction MetabolicNconc
              VariableReference CritNconc: VariableName=[Leaf].criticalNConc
              VariableReference MinNconc: VariableName=[Leaf].minimumNconc
            VariableReference PotentialDMAllocation: VariableName=[Leaf].potentialDMAllocation.Structural
          StorageNDemandFunction Storage
            Constant NitrogenDemandSwitch: FixedValue=1
            VariableReference MaxNconc: VariableName=[Leaf].maximumNconc
          Constant QStructuralPriority: FixedValue=1
          Constant QMetabolicPriority: FixedValue=1
          Constant QStoragePriority: FixedValue=1
        LinearInterpolationFunction FrostFraction
          XYPairs: X=[-4, 4]; Y=[1, 1]
          VariableReference XValue: VariableName=[Weather].MinT
        PhaseLookup DeltaLAI
          PhaseLookupValue Vegetative: Start=Emergence; End=StartFlowering
            MultiplyFunction Delta
              VariableReference AreaLargestLeaf: VariableName=[Leaf].AreaLargestLeaf
              LinearInterpolationFunction RelativeArea
                Memo
                  This approach is based upon that used in [robertson_simulation_2002].
                XYPairs: X=[1, 2, 3, 4, 8]; Y=[0.03, 0.06, 0.012, 0.25, 1]
                VariableReference XValue: VariableName=[Leaf].NodeNumber
              LinearInterpolationFunction StageFactoor
                Memo
                  This approach is based upon that used in [robertson_simulation_2002].
                XYPairs: X=[3, 4, 5, 5.2]; Y=[1, 1, 1, 0.1]
                VariableReference XValue: VariableName=[Phenology].Stage
              VariableReference PlantNumber: VariableName=[Canola].SowingData.Population
              VariableReference BranchNumber: VariableName=[Leaf].BranchNumber
              DivideFunction LAR
                VariableReference TT: VariableName=[Leaf].ThermalTime
                VariableReference Phyllochron: VariableName=[Leaf].Phyllochron
              VariableReference NitrogenFactor: VariableName=[Leaf].FNmetabolic
              WeightedTemperatureFunction TemperatureFactor: same as Replacements.CanolaFull.Leaf.BranchNumber.CumulativeBranching.DeltaBranch.TemperatureFactor
          PhaseLookupValue Reproductive: Start=StartFlowering; End=Maturity
            Constant: FixedValue=0
        Constant SpecificArea: FixedValue=0.025; Units=m^2/g
        Constant AreaLargestLeaf: FixedValue=0.015
        DivideFunction SpecificAreaCanopy
          VariableReference LAI: VariableName=[Leaf].Area
          VariableReference LeafWt: VariableName=[Leaf].Live.Wt
        LinearInterpolationFunction BranchingRate
          XYPairs: X=[0, 6.9, 7, 8, 9]; Y=[0, 0, 1, 1, 0]
          VariableReference XValue: VariableName=[Leaf].NodeNumber
        HoldFunction FinalLeafNumber: WhenToHold=FloralInitiation
          AddFunction FLN
            Constant PrimordiaAtEmergence: FixedValue=3
            AccumulateFunction InitiatedPrimordia: StartStageName=Germination; EndStageName=FloralInitiation; FractionRemovedOnCut=1; FractionRemovedOnHarvest=1; FractionRemovedOnGraze=1; FractionRemovedOnPrune=0
              DivideFunction DailyPrimordiaAppearance
                VariableReference TT: VariableName=[Phenology].ThermalTime
                VariableReference Plastochron: VariableName=[Leaf].Plastochron
        ExpressionFunction Plastochron: Expression=[Leaf].Phyllochron * [Leaf].Plastochron.Multiplier
          Constant Multiplier: FixedValue=0.8
        MultiplyFunction Phyllochron
          Constant Base: FixedValue=56
          LinearInterpolationFunction Multiplier
            XYPairs: X=[1, 7, 8, 9]; Y=[1, 1, 0.45, 0.45]
            VariableReference XValue: VariableName=[Leaf].NodeNumber
        ExpressionFunction TrueLeafNumber: Expression=[Leaf].NodeNumber - 1
      ReproductiveOrgan Grain: GrowthRespiration=0; MaintenanceRespiration=0
        Biomass Live
        Biomass Dead
        AddFunction FillingDuration
          VariableReference EarlyGrainFillingDuration: VariableName=[Phenology].EarlyGrainFilling.Target
          VariableReference MidGrainFillingDuration: VariableName=[Phenology].MidGrainFilling.Target
          VariableReference LateGrainFillingDuration: VariableName=[Phenology].LateGrainFilling.Target
        PhaseLookup DMDemandFunction
          PhaseLookupValue GrainFilling: Start=StartGrainFilling; End=EndGrainFill
            MultiplyFunction HIGrainDemand
              VariableReference AboveGroundWt: VariableName=[AboveGround].Wt
              DivideFunction HarvestIndexIncrease
                MaximumFunction OutstandingHarvestIndexIncrease
                  ExpressionFunction Increase: Expression=[Grain].PotentialHarvestIndex - [Grain].HarvestIndex
                  Constant Zero: FixedValue=0
                SubtractFunction TTRemaining
                  ExpressionFunction ReproductiveTT
                    Expression=[Phenology].EarlyGrainFilling.Target+[Phenology].MidGrainFilling.Target+[Phenology].LateGrainFilling.Target
                  ExpressionFunction ReproductiveTTComplete
                    Expression=[Phenology].EarlyGrainFilling.ProgressThroughPhase+[Phenology].MidGrainFilling.ProgressThroughPhase+[Phenology].LateGrainFilling.ProgressThroughPhase
              VariableReference ThermalTime: VariableName=[Phenology].ThermalTime
        Constant MinimumNConc: FixedValue=0.05
        Constant MaximumNConc: FixedValue=0.058
        Constant WaterContent: FixedValue=0.13
        MultiplyFunction NFillingRate
          VariableReference NConc: VariableName=[Grain].MaximumNConc
          VariableReference DMDemand: VariableName=[Grain].DMDemandFunction
          VariableReference DMConversionEfficiency: VariableName=[Grain].DMConversionEfficiency
        BiomassRemoval BiomassRemovalDefaults
          OrganBiomassRemovalType Harvest: FractionLiveToRemove=1; FractionDeadToRemove=1; FractionLiveToResidue=0; FractionDeadToResidue=0
          OrganBiomassRemovalType Cut: FractionLiveToRemove=0; FractionDeadToRemove=0; FractionLiveToResidue=1; FractionDeadToResidue=1
        Constant DMConversionEfficiency: FixedValue=0.89
        Constant RemobilisationCost: FixedValue=0
        Constant CarbonConcentration: FixedValue=0.4
        DivideFunction HarvestIndex
          VariableReference GrainWt: VariableName=[Grain].Wt
          VariableReference AboveGroundWt: VariableName=[AboveGround].Wt
        Constant MaximumPotentialGrainSize: FixedValue=0.0038
          Memo
            This parameter is only used to provide a very approximate estimate of final grain number.  Grain growth is calculated from harvest index increase.
        MultiplyFunction PotentialHarvestIndex
          VariableReference PodHarvestIndex: VariableName=[Pod].PotentialHarvestIndex
          Constant GrainFraction: FixedValue=0.72; Units=0-1
        NutrientPoolFunctions DMDemandPriorityFactors
          Constant Structural: FixedValue=1
          Constant Metabolic: FixedValue=1
          Constant Storage: FixedValue=1
        NutrientPoolFunctions NDemandPriorityFactors: same as Replacements.CanolaFull.Grain.DMDemandPriorityFactors
        DivideFunction NumberFunction
          Memo
            Grain number is simply estimated from grain mass and a constant potential grain size.
          VariableReference GrainMass: VariableName=[Grain].Wt
          VariableReference PotentialGrainSize: VariableName=[Grain].MaximumPotentialGrainSize
      GenericOrgan Stem: IsAboveGround=true
        Constant NReallocationFactor: FixedValue=1
        PhaseLookup NRetranslocationFactor
          PhaseLookupValue Vegetative: Start=Emergence; End=StartGrainFilling
            Constant RetranslocationFactor: FixedValue=0
          PhaseLookupValue GrainFilling: Start=StartGrainFilling; End=EndGrainFill
            Constant RetranslocationFactor: FixedValue=0.1
        PhaseLookup DMRetranslocationFactor
          PhaseLookupValue Vegetative: Start=Emergence; End=StartGrainFilling
            Constant RetranslocationFactor: FixedValue=0
          PhaseLookupValue GrainFilling: Start=StartGrainFilling; End=EndGrainFill
            Constant RetranslocationFactor: FixedValue=0.2
        LinearInterpolationFunction MaximumNConcX
          XYPairs: X=[3, 4, 5, 6]; Y=[4, 0.035, 0.025, 0.02]
          VariableReference XValue: VariableName=[Phenology].Stage
        VariableReference MaximumNConc: VariableName=[Leaf].MaximumNConc
        Constant MinimumNConc: FixedValue=0.005
        PhaseLookupValue NitrogenDemandSwitch: Start=Emergence; End=StartGrainFilling
          Constant: FixedValue=1
        BiomassRemoval BiomassRemovalDefaults
          OrganBiomassRemovalType Harvest: FractionLiveToRemove=0.5; FractionDeadToRemove=0; FractionLiveToResidue=0.1; FractionDeadToResidue=0
          OrganBiomassRemovalType Cut: FractionLiveToRemove=0.8; FractionDeadToRemove=0; FractionLiveToResidue=0; FractionDeadToResidue=0
        PhaseLookup SenescenceRate
          PhaseLookupValue PostCanopyPhase: Start=EndPodDevelopment; End=Maturity
            MinimumFunction Rate
              DivideFunction Fraction
                VariableReference TT: VariableName=[Phenology].ThermalTime
                SubtractFunction TTRemaining
                  ExpressionFunction PostCanopyTT
                    Expression=[Phenology].LateGrainFilling.Target+[Phenology].Maturing.Target
                  ExpressionFunction PostCanopyTTComplete
                    Expression=[Phenology].LateGrainFilling.ProgressThroughPhase+[Phenology].Maturing.ProgressThroughPhase
              Constant One: FixedValue=1
        Constant DetachmentRateFunction: FixedValue=0; Units=/d
        Constant MaintenanceRespirationFunction: FixedValue=0; Units=0-1
        Constant DMConversionEfficiency: FixedValue=1; Units=0-1
        Constant DMReallocationFactor: FixedValue=1
        VariableReference CriticalNConc: VariableName=[Stem].MinimumNConc
        Constant RemobilisationCost: FixedValue=0
        Constant CarbonConcentration: FixedValue=0.4
        NutrientDemandFunctions NDemands
          MultiplyFunction Structural
            VariableReference MinNconc: VariableName=[Stem].minimumNconc
            VariableReference PotentialDMAllocation: VariableName=[Stem].potentialDMAllocation.Structural
          MultiplyFunction Metabolic
            SubtractFunction MetabolicNconc
              VariableReference CritNconc: VariableName=[Stem].criticalNConc
              VariableReference MinNconc: VariableName=[Stem].minimumNconc
            VariableReference PotentialDMAllocation: VariableName=[Stem].potentialDMAllocation.Structural
          StorageNDemandFunction Storage
            VariableReference NitrogenDemandSwitch: VariableName=[Stem].nitrogenDemandSwitch
            VariableReference MaxNconc: VariableName=[Stem].maximumNconc
          Constant QStructuralPriority: FixedValue=1
          Constant QMetabolicPriority: FixedValue=1
          Constant QStoragePriority: FixedValue=1
        RetranslocateNonStructural RetranslocateNitrogen
        NutrientPoolFunctions InitialWt
          Constant Structural: FixedValue=0; Units=g/m^2
          Constant Metabolic: FixedValue=0
          Constant Storage: FixedValue=0
        Constant Photosynthesis: FixedValue=0
        VariableReference initialNConcFunction: VariableName=[Stem].MinimumNConc
        PartitionFractionDemandFunction PotentialGrowth
          PhaseLookup PartitionFraction
            PhaseLookupValue StemGrowthPhase: Start=Emergence; End=EndFlowering
              LinearInterpolationFunction StemFraction
                XYPairs: X=[100, 101, 200, 201, 400]; Y=[0.5, 0.5, 0.5, 0.75, 0.75]
                VariableReference XValue: VariableName=[AboveGround].Wt
            PhaseLookupValue GrainFilling: Start=EndFlowering; End=EndGrainFill
              Constant StemFraction: FixedValue=0
        NutrientDemandFunctions DMDemands
          MultiplyFunction Structural
            PhaseLookup Fraction
              PhaseLookupValue EarlyStemGrowthPhase: Start=Emergence; End=StartFlowering
                Memo
                  This approach is based upon that used in [robertson_simulation_2002].
                Constant Fraction: FixedValue=0.7
              PhaseLookupValue LateStemGrowthPhase: Start=StartFlowering; End=EndFlowering
                Memo
                  This approach is based upon that used in [robertson_simulation_2002].
                Constant Fraction: FixedValue=0.8
              PhaseLookupValue PodAndGrainGrowth: Start=EndFlowering; End=EndGrainFill
                Constant Fraction: FixedValue=0
            VariableReference DMDemand: VariableName=[Stem].PotentialGrowth
          Constant Metabolic: FixedValue=0
          MultiplyFunction Storage
            VariableReference DMDemand: VariableName=[Stem].PotentialGrowth
            SubtractFunction StorageFraction
              Constant One: FixedValue=1
              VariableReference StructuralFraction: VariableName=[Stem].DMDemands.Structural.Fraction
          Constant QStructuralPriority: FixedValue=1
          Constant QMetabolicPriority: FixedValue=1
          Constant QStoragePriority: FixedValue=1
      GenericOrgan Shell: IsAboveGround=true
        Constant NReallocationFactor: FixedValue=1
        Constant NRetranslocationFactor: FixedValue=0.5
        Constant MaximumNConc: FixedValue=0.045
        VariableReference CriticalNConc: VariableName=[Shell].MinimumNConc
        Constant MinimumNConc: FixedValue=0.01
        Constant DMRetranslocationFactor: FixedValue=0.1
        PhaseLookupValue NitrogenDemandSwitch: Start=StartPodDevelopment; End=EndPodDevelopment
          Constant: FixedValue=1
        BiomassRemoval BiomassRemovalDefaults: same as Replacements.CanolaFull.Leaf.BiomassRemovalDefaults
        PhaseLookup SenescenceRate
          PhaseLookupValue ReproductivePhase: Start=EndPodDevelopment; End=Maturity
            MinimumFunction Rate
              DivideFunction Fraction
                VariableReference TT: VariableName=[Phenology].ThermalTime
                SubtractFunction TTRemaining
                  ExpressionFunction ReproductiveTT
                    Expression=[Phenology].LateGrainFilling.Target + [Phenology].Maturing.Target
                  ExpressionFunction ReproductiveTT1Complete
                    Expression=[Phenology].LateGrainFilling.ProgressThroughPhase + [Phenology].Maturing.ProgressThroughPhase
              Constant One: FixedValue=1
        Constant DetachmentRateFunction: FixedValue=0; Units=/d
        Constant MaintenanceRespirationFunction: FixedValue=0; Units=0-1
        Constant DMConversionEfficiency: FixedValue=1; Units=0-1
        Constant DMReallocationFactor: FixedValue=0
        Constant RemobilisationCost: FixedValue=0
        Constant CarbonConcentration: FixedValue=0.4
        AddFunction FillingDuration
          VariableReference EarlyPodDevelopmentDuration: VariableName=[Phenology].EarlyPodDevelopment.Target
          VariableReference EarlyGrainFillingDuration: VariableName=[Phenology].EarlyGrainFilling.Target
          VariableReference MidGrainFillingDuration: VariableName=[Phenology].MidGrainFilling.Target
        NutrientDemandFunctions DMDemands
          MultiplyFunction Structural
            PhaseLookup DMDemandFunction
              PhaseLookupValue PodDevelopment: Start=StartPodDevelopment; End=EndPodDevelopment
                MultiplyFunction HIPodDemand
                  VariableReference AboveGroundWt: VariableName=[AboveGround].Wt
                  DivideFunction HarvestIndexIncrease
                    MaximumFunction OutstandingHarvestIndexIncrease
                      ExpressionFunction Increase: Expression=[Shell].PotentialHarvestIndex - [Shell].HarvestIndex
                      Constant Zero: FixedValue=0
                    SubtractFunction TTRemaining
                      ExpressionFunction ShellGrowthTT
                        Expression=[Phenology].EarlyPodDevelopment.Target+[Phenology].EarlyGrainFilling.Target+[Phenology].MidGrainFilling.Target
                      ExpressionFunction ShellGrowthTTComplete
                        Expression=[Phenology].EarlyPodDevelopment.ProgressThroughPhase+[Phenology].EarlyGrainFilling.ProgressThroughPhase+[Phenology].MidGrainFilling.ProgressThroughPhase
                  VariableReference ThermalTime: VariableName=[Phenology].ThermalTime
            Constant StructuralFraction: FixedValue=1
          Constant Metabolic: FixedValue=0
          StorageDMDemandFunction Storage
            SubtractFunction StorageFraction
              Constant One: FixedValue=1
              VariableReference StructuralFraction: VariableName=[Shell].DMDemands.Structural.StructuralFraction
          Constant QStructuralPriority: FixedValue=1
          Constant QMetabolicPriority: FixedValue=1
          Constant QStoragePriority: FixedValue=1
        NutrientDemandFunctions NDemands
          MultiplyFunction Structural
            VariableReference MinNconc: VariableName=[Shell].minimumNconc
            VariableReference PotentialDMAllocation: VariableName=[Shell].potentialDMAllocation.Structural
          StorageNDemandFunction Storage
            VariableReference NitrogenDemandSwitch: VariableName=[Shell].nitrogenDemandSwitch
            VariableReference MaxNconc: VariableName=[Shell].maximumNconc
          Constant Metabolic: FixedValue=0
          Constant QStructuralPriority: FixedValue=1
          Constant QMetabolicPriority: FixedValue=1
          Constant QStoragePriority: FixedValue=1
        RetranslocateNonStructural RetranslocateNitrogen
        NutrientPoolFunctions InitialWt: same as Replacements.CanolaFull.Stem.InitialWt
        MultiplyFunction PotentialHarvestIndex
          VariableReference PodHarvestIndex: VariableName=[Pod].PotentialHarvestIndex
          Constant ShellFraction: FixedValue=0.28; Units=0-1
        DivideFunction HarvestIndex
          VariableReference ShellWt: VariableName=[Shell].Wt
          VariableReference AboveGroundWt: VariableName=[AboveGround].Wt
        VariableReference initialNConcFunction: VariableName=[Shell].MinimumNConc
        ExpressionFunction Area: Expression=[Shell].Live.Wt*[Shell].SpecificArea
          VariableReference Index: VariableName=[Shell].Area
        Constant SpecificArea: FixedValue=0.01; Units=m^2/g
        EnergyBalance: Albedo=0.25; Gsmax350=0.015; R50=150; KDead=0; LAIDead=0
          MinimumFunction FRGRer
            VariableReference RUE_FT: VariableName=[Shell].Photosynthesis.FT
            MinimumFunction Others
              VariableReference RUE_FN: VariableName=[Shell].Photosynthesis.FN
              VariableReference RUE_FVPD: VariableName=[Shell].Photosynthesis.FVPD
          VariableReference Tallness: VariableName=[Leaf].Height
          VariableReference Deepness: VariableName=[Leaf].Height
          Constant DeadAreaIndex: FixedValue=1
          Constant GreenExtinctionCoefficient: FixedValue=0.8
          Constant Wideness: FixedValue=0
          Constant DeadExtinctionCoefficient: FixedValue=0
          StomatalConductanceCO2Modifier
            VariableReference PhotosynthesisCO2Modifier: VariableName=[Shell].Photosynthesis.FCO2
          VariableReference GreenAreaIndex: VariableName=[Shell].Area.Index
        RUEModel Photosynthesis
          VariableReference RUE: VariableName=[Leaf].Photosynthesis.RUE
          VariableReference FT: VariableName=[Leaf].Photosynthesis.FT
          VariableReference FVPD: VariableName=[Leaf].Photosynthesis.FVPD
          LinearInterpolationFunction FN
            XYPairs: X=[0, 1, 1.5]; Y=[1, 1, 1]
            VariableReference XValue: VariableName=[Leaf].Fn
          LinearInterpolationFunction FW
            XYPairs: X=[0, 1]; Y=[0, 1]
            VariableReference XValue: VariableName=[Leaf].Fw
          VariableReference RadnInt: VariableName=[Shell].EnergyBalance.RadiationIntercepted
          VariableReference FCO2: VariableName=[Leaf].Photosynthesis.FCO2
      CompositeBiomass Pod: OrganNames=[Shell, Grain]; IncludeLive=true; IncludeDead=true
        DivideFunction HarvestIndex
          VariableReference PodWt: VariableName=[Pod].Wt
          VariableReference AboveGroundWt: VariableName=[AboveGround].Wt
        Constant PotentialHarvestIndex: FixedValue=0.6
          Memo
            This approach is based upon that used in [robertson_simulation_2002].
      Constant MortalityRate: FixedValue=0
      CompositeBiomass AboveGround: OrganNames=[Leaf, Stem, Grain, Shell]; IncludeLive=true; IncludeDead=true
      CompositeBiomass AboveGroundLive: OrganNames=[Leaf, Stem, Grain, Shell]; IncludeLive=true; IncludeDead=false
      CompositeBiomass BelowGround: OrganNames=[Root]; IncludeLive=true; IncludeDead=true
      CompositeBiomass Total: OrganNames=[Leaf, Stem, Grain, Shell, Root]; IncludeLive=true; IncludeDead=true
      CompositeBiomass TotalLive: OrganNames=[Leaf, Stem, Grain, Shell, Root]; IncludeLive=true; IncludeDead=false
      CompositeBiomass TotalDead: OrganNames=[Leaf, Stem, Grain, Shell, Root]; IncludeLive=false; IncludeDead=true
      Constant SeedMortalityRate: FixedValue=0
      ModelOverrides ForageBrassica
        Folder CultivarFolder
          Memo
            Cultivar names include several codes for several traits.
            * RR = Roundup Ready - These cultivars are developed to provide tolerance for Glyphosate herbicide.
            * CL = Clearfield - These cultivars as developed for the Clearfield Canola weed control system.
            * TT = Triazine Tolerant - These cultivars are developed to provide tolerance for triazine herbicide
            * RT = Triazine and Roundup - These cultivars are developed to provide tolerance to both triazine and glyphosate herbicides.
          Cultivar Goliath
            Command:
              [Phenology].Vegetative.Target.XYPairs.X = 0,24
              [Phenology].Vegetative.Target.XYPairs.Y = 400,200
              [Leaf].Phyllochron.Base.FixedValue = 46
          Cultivar HTR24
            Command:
              [Phenology].Vegetative.Target.XYPairs.X = 0,24
              [Phenology].Vegetative.Target.XYPairs.Y = 400,200
              [Leaf].Phyllochron.Base.FixedValue = 46
          Cultivar Pallaton
            Command:
              [Phenology].Vegetative.Target.XYPairs.X = 0,24
              [Phenology].Vegetative.Target.XYPairs.Y = 400,200
              [Leaf].Phyllochron.Base.FixedValue = 46
          Cultivar Winfred
            Command:
              [Phenology].Vegetative.Target.XYPairs.X = 0,24
              [Phenology].Vegetative.Target.XYPairs.Y = 400,200
              [Leaf].Phyllochron.Base.FixedValue = 46
    Plant ForageBrassicaold: ResourceName=Canola
      OrganArbitrator Arbitrator: same as Replacements.CanolaFull.Arbitrator
      Phenology: same as Replacements.CanolaFull.Phenology
      Root: same as Replacements.CanolaFull.Root
      SimpleLeaf Leaf: Albedo=0.25; Gsmax350=0.015; R50=150; LeafInitialisationStage=Emergence; Height=0; BaseHeight=0; Width=0; FRGR=0; PotentialEP=0; WaterDemand=0; KDead=0.3; LAIDead=0
        PhaseLookup ThermalTime: same as Replacements.CanolaFull.Leaf.ThermalTime
        RUEModel Photosynthesis: same as Replacements.CanolaFull.Leaf.Photosynthesis
        StomatalConductanceCO2Modifier
          VariableReference PhotosynthesisCO2Modifier: VariableName=[Leaf].Photosynthesis.FCO2
        MaximumFunction Area
          AddFunction Calculation
            MultiplyFunction Initial
              Constant AreaPerPlant: FixedValue=0.0005
              VariableReference Population: VariableName=[Plant].SowingData.Population
            SubtractFunction Change: same as Replacements.CanolaFull.Leaf.Area.Calculation.Change
          Constant Zero: FixedValue=0
        MinimumFunction FRGR: same as Replacements.CanolaFull.Leaf.FRGR
        Constant ExtinctionCoefficient: FixedValue=0.6
        LinearInterpolationFunction Tallness: same as Replacements.CanolaFull.Leaf.Tallness
        AddFunction NodeNumber: same as Replacements.CanolaFull.Leaf.NodeNumber
        AddFunction BranchNumber: same as Replacements.CanolaFull.Leaf.BranchNumber
        AccumulateFunction Number: StartStageName=Emergence; EndStageName=GreenBud; FractionRemovedOnCut=1; FractionRemovedOnHarvest=1; FractionRemovedOnGraze=1; FractionRemovedOnPrune=0
          MultiplyFunction DailyNumberIncrease
            VariableReference DeltaNode: VariableName=[Leaf].NodeNumber.Change.DeltaNode
            VariableReference BranchNumber: VariableName=[Leaf].BranchNumber
            VariableReference PlantNumber: VariableName=[Plant].SowingData.Population
        Constant NReallocationFactor: FixedValue=0.5
          Memo
            This model assumes that all metabolic and storage N is available for reallocation from senescing leaves.
        PhaseLookup SenescenceRate: same as Replacements.CanolaFull.Leaf.SenescenceRate
        Constant DetachmentRate: FixedValue=0.05; Units=/d
        MultiplyFunction InitialWt
          Constant MassPerPlant: FixedValue=0.06
          VariableReference Population: VariableName=[Plant].SowingData.Population
        MultiplyFunction LAIDead
          VariableReference SLA: VariableName=[Leaf].SpecificAreaCanopy
          VariableReference LeafDeadWt: VariableName=[Leaf].Dead.Wt
        LinearInterpolationFunction MaximumNConc
          XYPairs: X=[1, 3, 8]; Y=[0.06, 0.035, 0.03]
          VariableReference XValue: VariableName=[Leaf].NodeNumber
        VariableReference CriticalNConc: VariableName=[Leaf].MaximumNConc
        Constant MinimumNConc: FixedValue=0.02
        Constant MaintenanceRespiration: FixedValue=0; Units=0-1
        Constant DMConversionEfficiency: FixedValue=1; Units=0-1
        BiomassRemoval BiomassRemovalDefaults: same as Replacements.CanolaFull.Leaf.BiomassRemovalDefaults
        Constant NRetranslocationFactor: FixedValue=0.5
        Constant DMReallocationFactor: FixedValue=0
        Constant DMRetranslocationFactor: FixedValue=0.5
        Constant RemobilisationCost: FixedValue=0
        Constant CarbonConcentration: FixedValue=0.4
        NutrientDemandFunctions DMDemands: same as Replacements.CanolaFull.Leaf.DMDemands
        NutrientDemandFunctions NDemands: same as Replacements.CanolaFull.Leaf.NDemands
        LinearInterpolationFunction FrostFraction: same as Replacements.CanolaFull.Leaf.FrostFraction
        PhaseLookup DeltaLAI
          PhaseLookupValue Vegetative: Start=Emergence; End=StartFlowering
            MultiplyFunction Delta
              VariableReference AreaLargestLeaf: VariableName=[Leaf].AreaLargestLeaf
              LinearInterpolationFunction RelativeArea: same as Replacements.CanolaFull.Leaf.DeltaLAI.Vegetative.Delta.RelativeArea
              LinearInterpolationFunction StageFactoor: same as Replacements.CanolaFull.Leaf.DeltaLAI.Vegetative.Delta.StageFactoor
              VariableReference PlantNumber: VariableName=[Plant].SowingData.Population
              VariableReference BranchNumber: VariableName=[Leaf].BranchNumber
              DivideFunction LAR
                VariableReference TT: VariableName=[Leaf].ThermalTime
                VariableReference Phyllochron: VariableName=[Leaf].Phyllochron
              VariableReference NitrogenFactor: VariableName=[Leaf].FNmetabolic
              WeightedTemperatureFunction TemperatureFactor: same as Replacements.CanolaFull.Leaf.BranchNumber.CumulativeBranching.DeltaBranch.TemperatureFactor
          PhaseLookupValue Reproductive: Start=StartFlowering; End=Maturity
            Constant: FixedValue=0
        Constant SpecificArea: FixedValue=0.025; Units=m^2/g
        Constant AreaLargestLeaf: FixedValue=0.015
        DivideFunction SpecificAreaCanopy
          VariableReference LAI: VariableName=[Leaf].Area
          VariableReference LeafWt: VariableName=[Leaf].Live.Wt
        LinearInterpolationFunction BranchingRate
          XYPairs: X=[0, 6.9, 7, 8, 9]; Y=[0, 0, 1, 1, 0]
          VariableReference XValue: VariableName=[Leaf].NodeNumber
        HoldFunction FinalLeafNumber: same as Replacements.CanolaFull.Leaf.FinalLeafNumber
        ExpressionFunction Plastochron: Expression=[Leaf].Phyllochron * [Leaf].Plastochron.Multiplier
          Constant Multiplier: FixedValue=0.8
        MultiplyFunction Phyllochron: same as Replacements.CanolaFull.Leaf.Phyllochron
        ExpressionFunction TrueLeafNumber: Expression=[Leaf].NodeNumber - 1
      ReproductiveOrgan Grain: same as Replacements.CanolaFull.Grain
      GenericOrgan Stem: same as Replacements.CanolaFull.Stem
      GenericOrgan Shell: same as Replacements.CanolaFull.Shell
      CompositeBiomass Pod: same as Replacements.CanolaFull.Pod
      Constant MortalityRate: FixedValue=0
      CompositeBiomass AboveGround: OrganNames=[Leaf, Stem, Grain, Shell]; IncludeLive=true; IncludeDead=true
      CompositeBiomass AboveGroundLive: OrganNames=[Leaf, Stem, Grain, Shell]; IncludeLive=true; IncludeDead=false
      CompositeBiomass BelowGround: OrganNames=[Root]; IncludeLive=true; IncludeDead=true
      CompositeBiomass Total: OrganNames=[Leaf, Stem, Grain, Shell, Root]; IncludeLive=true; IncludeDead=true
      CompositeBiomass TotalLive: OrganNames=[Leaf, Stem, Grain, Shell, Root]; IncludeLive=true; IncludeDead=false
      CompositeBiomass TotalDead: OrganNames=[Leaf, Stem, Grain, Shell, Root]; IncludeLive=false; IncludeDead=true
      Constant SeedMortalityRate: FixedValue=0
      ModelOverrides SpeciesParameters
      Folder CultivarFolder: same as Replacements.CanolaFull.ForageBrassica.CultivarFolder
  Folder Validation
    Memo
      A test dataset has been developed to test the APSIM Canola model for a range of environmental (soil and climate) conditions, management options (sowing dates, populations, nitrogen rates, irrigation) and genetic backgrounds (different regions, cultivar types).  These tests have been grouped into experiments focusing on phenological development or growth and resource use.  Graphs of model performance are provided for yield, biomass production, canopy development, phenological development, water and nitrogen uptake, and grain yield components.
    Folder Tosari
      Experiment Tosari2018
        Factors
          Factor Cv
            Specification=[SowingRule].Script.CultivarName=Goliath, HTR24, Pallaton, Winfred
        Simulation Tosari2018Base
          Memo
            Need to sort out soil and check whether N rules are correct.

            soil sampling done on 9 May   - gravimetric
            Row Labels	Average of %H20 (g/g)
            0-10cm	0.1254
            10-20cm	0.0837
            20-40cm	0.0837
            40-60cm	0.1019
            60-80cm	0.1426
            80-100cm	0.1818
            100-120cm	0.1850

            N applied at sowing, 18/6/13 and topdressed at flowering (14/8/13)

            Also treatments with 0 or 150N and lots of biomass data.
          Clock: Start=2019-06-13; End=2019-12-31
          Summary summaryfile
          Weather: FileName=Tosari_1958-2020.met
          MicroClimate: a_interception=0; b_interception=0; c_interception=0; d_interception=0; SoilHeatFluxFraction=0; MinimumHeightDiffForNewLayer=0; NightInterceptionFraction=0; ReferenceHeight=2
          SoilArbitrator
          Zone paddock: Area=1; Slope=0; AspectAngle=0; Altitude=50
            SurfaceOrganicMatter SurfaceOM: InitialResidueName=chickpea; InitialResidueType=chickpea; InitialResidueMass=0; InitialStandingFraction=0; InitialCPR=0; InitialCNR=80
            Fertiliser
            Irrigation
            Report DailyReport: EventNames=[Clock].DoReport
              VariableNames:
                [Clock].Today
                [Canola].SowingData.Cultivar
                [Canola].Phenology.CurrentStageName
                [Weather].MeanT
                [Soil].Water.Volumetric
                [Soil].Water.MM
                sum([Soil].Water.MM) as ProfileWater
                [Canola].AboveGround.N
                [Canola].AboveGround.Wt
                [Canola].AboveGroundLive.N
                [Canola].AboveGroundLive.N*10 as UptakeNKgHA
                [Canola].AboveGroundLive.Wt
                [Canola].Arbitrator.DM.TotalFixationSupply
                [Canola].Grain.N
                [Canola].Grain.NConc
                [Canola].Grain.Number
                [Canola].Grain.Size
                [Canola].Grain.Wt
                [Canola].Grain.Live.Wt
                [Canola].Leaf.AppearedCohortNo
                [Canola].Leaf.CoverDead
                [Canola].Leaf.CoverGreen
                [Canola].Leaf.CoverTotal
                [Canola].Leaf.Dead.N
                [Canola].Leaf.Dead.NConc
                [Canola].Leaf.Dead.Wt
                [Canola].Leaf.DeadCohortNo
                [Canola].Leaf.GreenCohortNo
                [Canola].Leaf.SenescingCohortNo
                [Canola].Leaf.ExpandedCohortNo
                [Canola].Leaf.Fn
                [Canola].Leaf.Fw
                [Canola].Leaf.Height
                [Canola].Leaf.InitialisedCohortNo
                [Canola].Leaf.LAI
                [Canola].Leaf.Live.N
                [Canola].Leaf.Live.NConc
                [Canola].Leaf.Live.Wt
                [Canola].Leaf.SpecificArea
                [Canola].Leaf.Transpiration
                [Canola].Phenology.CurrentPhase.Name
                [Canola].Phenology.CurrentStageName
                [Canola].Phenology.Photoperiod
                [Canola].Phenology.Stage
                [Canola].Phenology.ThermalTime
                [Canola].Phenology.ThermalTime
                [Canola].Root.Depth
                [Canola].Root.N
                [Canola].Root.Wt
                [Canola].Root.Nconc
                [Canola].Root.WaterUptake
                [Canola].Stem.N
                [Canola].Stem.NConc
                [Canola].Stem.Wt
                [Canola].Stem.Live.StorageWt
                [Canola].SowingData.Cultivar
                [Canola].Structure.Height
                [Canola].Structure.LeafTipsAppeared
                [Canola].Structure.MainStemPopn
                [Canola].Structure.TotalStemPopn
                [SurfaceOrganicMatter].Wt
                sum([Soil].NO3.kgha) as TotalSoilNitrogen
                [Canola].Phenology.MaturityDAS
                [Canola].Phenology.PhotoPeriod
                [Canola].Phenology.Stage
                [Clock].Today.Year
            Report HarvestReport: EventNames=[ForageBrassica].Harvesting
              VariableNames:
                [Clock].Today
                [ForageBrassica].SowingDate
                [ForageBrassica].SowingData.Cultivar
                [ForageBrassica].Phenology.CurrentStageName
                [ForageBrassica].Phenology.EmergenceDAS
                [ForageBrassica].Phenology.FloralInitiationDAS
                [ForageBrassica].Phenology.GreenBudDAS
                [ForageBrassica].Phenology.StartFloweringDAS
                [ForageBrassica].Phenology.CumulativeVernalTime
                [ForageBrassica].Grain.Wt
            Manager Fertilise at sowing
              Crop = [ForageBrassica]
              FertiliserType = NH4N
              Amount = 0
```csharp
using Models.Soils;
using System;
using Models.Core;
using Models.PMF;
namespace Models
{
    [Serializable]
    public class Script : Model
    {
        [Link] Clock Clock;
        [Link] Fertiliser Fertiliser;
        [Link] Summary summary;

        [Description("Crop to be fertilised")]
        public IPlant Crop { get; set; }

        [Description("Type of fertiliser to apply? ")] 
        public Fertiliser.Types FertiliserType { get; set; }

        [Description("Amount of fertiliser to be applied (kg/ha)")]
        public double Amount { get; set; }

        [EventSubscribe("Sowing")]
        public void OnSowing(object sender, EventArgs e)
        {
            Model crop = sender as Model;
            if (Crop != null && crop.Name.ToLower() == (Crop as IModel).Name.ToLower())
                Fertiliser.Apply(Amount: Amount, Type: FertiliserType);  //Fertiliser.Types.NO3N
        }

    }
}
```
            Manager SowingRule
              CultivarName = Goliath
              SowDate = 13-jun
              SowingDepth = 50
              RowSpacing = 320
              Population = 38
```csharp
using APSIM.Shared.Utilities;
using Models.Utilities;
using Models.Soils;
using Models.PMF;
using Models.Core;
using System;

namespace Models
{
    [Serializable]
    public class Script : Model
    {
        [Link] Clock Clock;
        [Link] Fertiliser Fertiliser;
        [Link] Summary Summary;
        [Link] Plant ForageBrassica;
        [Link] Soil Soil;
        Accumulator accumulatedRain;
        
        [Description("Sowing date (d-mmm)")]
        public string SowDate { get; set; }
        [Description("Cultivar to be sown")]
        public string CultivarName { get; set; }
        [Description("Sowing depth (mm)")]
        public double SowingDepth { get; set; }
        [Description("Row spacing (mm)")]
        public double RowSpacing { get; set; }
        [Description("Plant population (/m2)")]
        public double Population { get; set; }
      
        


        [EventSubscribe("DoManagement")]
        private void OnDoManagement(object sender, EventArgs e)
        {
            if (DateUtilities.DatesAreEqual(SowDate, Clock.Today))
            {
                ForageBrassica.Sow(population: Population, cultivar: CultivarName, depth: SowingDepth, rowSpacing: RowSpacing);    
            }
        
        }
        
    }
}
```
            Manager Fertilise on fixed dates
              FertiliserType = NO3N
              FertiliserDates = 13-jun
              Amount = 55
              AmountType = True
```csharp
using Models.Soils;
using System;
using Models.Core;
using Models.PMF;
using APSIM.Shared.Utilities;
namespace Models
{
    [Serializable]
    public class Script : Model
    {
        [Link] Clock Clock;
        [Link] Fertiliser Fertiliser;
        
        [Separator("A component to apply fertiliser on one or more dates on every year of the simulation")]

        [Description("Type of fertiliser to apply? ")] public Fertiliser.Types FertiliserType { get; set; }

        [Description("Enter the fertilisation dates as dd-mmm with comma separation (any year information entered will be ignored): ")] public string[] FertiliserDates { get; set; } 

        [Description("Amount of fertiliser to be applied (kg /ha)")] public double Amount { get; set; }

        [Description("Is the above amount to be applied each time? (yes/ticked)? Or is it the total annual amount across all dates (no/unticked)")] public bool AmountType { get; set; }
        
        [EventSubscribe("DoManagement")]
        private void OnDoManagement(object sender, EventArgs e)
        {
            foreach (string ddMMM in FertiliserDates)
            {
                if (DateUtilities.DatesEqual(ddMMM, Clock.Today))
                {
                    if (AmountType)
                        Fertiliser.Apply(Amount: Amount, Type: FertiliserType);
                    else
                        Fertiliser.Apply(Amount: Amount / FertiliserDates.Length, Type: FertiliserType);
                }
            }
        }
    }
}
```
            Manager Irrigate on fixed dates
              IrrigateDates = 24-jun, 14-aug, 4-sep
              Amount = 45
              Depth = 0
              Efficiency = 1
              WillRunoff = False
```csharp
using Models.Soils;
using System;
using Models.Core;
using Models.PMF;
using APSIM.Shared.Utilities;
namespace Models
{
    [Serializable]
    public class Script : Model
    {
        [Link] Clock Clock;
        [Link] Irrigation Irrigation;
        
        [Separator("A component to apply irrigation on one or more dates on every year of the simulation")]

        [Description("Enter the irrigation dates as dd-mmm with comma separation (any year information entered will be ignored)")] 
        public string[] IrrigateDates { get; set; }
        
        [Description("Amount of irrigation to be applied (mm)")] 
        public double Amount { get; set; }
        
        [Description("Depth in the soil to apply the  irrigation (mm)")] 
        public double Depth { get; set; }
        
        [Description("Efficiency of irrigation (0-1)")] 
        public double Efficiency { get; set; }
        
        [Description("Will the irrigation runoff?")] 
        public bool WillRunoff { get; set; }
        
        [EventSubscribe("DoManagement")]
        private void OnDoManagement(object sender, EventArgs e)
        {
            foreach (string ddMMM in IrrigateDates)
            {
                if (DateUtilities.DatesEqual(ddMMM, Clock.Today))
                    Irrigation.Apply(amount: Amount, depth: Depth, efficiency: Efficiency, willRunoff: WillRunoff);
            }
        }
    }
}
```
            Manager HarvestAfterDate
              HarvestDate = 24-sep
```csharp
using Models.Soils;
using System;
using Models.Core;
using System.Text;
using Models.PMF;
using Models;
using APSIM.Shared.Utilities;
using Models.PMF.Phen;

namespace Models
{
    [Serializable] 
    public class Script : Model
    {
        [Link] ISummary summary;
        [Link] private Plant ForageBrassica;
        [Link] private Phenology phenology;
                [Link] Clock Clock;

        private bool Harvestable = false;

        [Description("Harvest Date (d-mmm)")]
        public string HarvestDate { get; set; }   
      
        [EventSubscribe("DoManagement")]
        private void OnDoManagement(object sender, EventArgs e)
        {
           
            if (Harvestable && phenology.CurrentPhase.Name == "ReadyForHarvesting")
            {
                ForageBrassica.Harvest();
                ForageBrassica.EndCrop();                
            }
            
            if (DateUtilities.DatesAreEqual(HarvestDate, Clock.Today))
                Harvestable = true;

        }
    }
}
```
            Plant ForageBrassica: ResourceName=Canola
              ModelOverrides
              Folder CultivarFolder1
                Memo: same as Replacements.CanolaFull.ForageBrassica.CultivarFolder.Memo
                Cultivar Goliath
                  Command:
                    [Phenology].Vegetative.Target.XYPairs.X = 0,24
                    [Phenology].Vegetative.Target.XYPairs.Y = 400,290
                    [Leaf].Phyllochron.Base.FixedValue = 90
                    [Leaf].Phyllochron.Multiplier.XYPairs.X = 1, 15, 18, 20
                    [Leaf].Phyllochron.Multiplier.XYPairs.X = 1, 1, 1.36, 1.36
                Cultivar HTR24
                  Command:
                    [Phenology].Vegetative.Target.XYPairs.X = 0,24
                    [Phenology].Vegetative.Target.XYPairs.Y = 400,290
                    [Leaf].Phyllochron.Base.FixedValue = 90
                    [Leaf].Phyllochron.Multiplier.XYPairs.X = 1, 15, 18, 20
                    [Leaf].Phyllochron.Multiplier.XYPairs.X = 1, 1, 1.36, 1.36
                Cultivar Pallaton
                  Command:
                    [Phenology].Vegetative.Target.XYPairs.X = 0,24
                    [Phenology].Vegetative.Target.XYPairs.Y = 400,290
                    [Leaf].Phyllochron.Base.FixedValue = 110
                    [Leaf].Phyllochron.Multiplier.XYPairs.X = 1, 9.9, 10, 20
                    [Leaf].Phyllochron.Multiplier.XYPairs.X = 1, 1, 1.42, 1.53
                    [Leaf].AreaLargestLeaf.FixedValue = 0.015
                    [Leaf].DeltaLAI.Vegetative.Delta.RelativeArea.XYPairs.X = 1,2,3,7,13
                    [Leaf].DeltaLAI.Vegetative.Delta.RelativeArea.XYPairs.Y = 0.01,0.02,0.05,0.1,1
                Cultivar Winfred
                  Command:
                    [Phenology].Vegetative.Target.XYPairs.X = 0,24
                    [Phenology].Vegetative.Target.XYPairs.Y = 400,290
                    [Leaf].Phyllochron.Base.FixedValue = 90
                    [Leaf].Phyllochron.Multiplier.XYPairs.X = 1, 15, 18, 20
                    [Leaf].Phyllochron.Multiplier.XYPairs.X = 1, 1, 1.36, 1.36
                    [Leaf].AreaLargestLeaf.FixedValue = 0.015
                    [Leaf].DeltaLAI.Vegetative.Delta.RelativeArea.XYPairs.X = 1,2,3,7,13
                    [Leaf].DeltaLAI.Vegetative.Delta.RelativeArea.XYPairs.Y = 0.01,0.02,0.05,0.1,1
            Soil: ASCOrder=Vertosol; ASCSubOrder=Black; SoilType=Clay; Site=Yandilla; NearestTown=Millmerran, Q 4364; Region=Darling Downs and Granite Belt; State=Queensland; Country=Australia; ApsoilNumber=7; Latitude=-27.872; Longitude=151.438; LocationAccuracy=+/- 20m; DataSource=CSIRO Sustainable Ecosystems, Toowoomba
              Physical
                Thickness  BD    AirDry  LL15  DUL   SAT
                150        1.04  0.14    0.17  0.53  0.58
                150        1.12  0.224   0.27  0.5   0.55
                300        1.13  0.28    0.3   0.49  0.54
                300        1.18  0.28    0.28  0.48  0.53
                300        1.29  0.28    0.28  0.4   0.45
                300        1.36  0.28    0.28  0.38  0.43
                300        1.33  0.28    0.28  0.39  0.44
                SoilCrop CanolaSoil: LL=[0.2, 0.3, 0.33, 0.35, 0.3, 0.34, 0.34]; KL=[0.06, 0.06, 0.06, 0.04, 0.04, 0.02, 0.01]; XF=[1, 1, 1, 1, 1, 1, 1]
                SoilCrop OatsSoil: LL=[0.2, 0.3, 0.33, 0.35, 0.3, 0.34, 0.34]; KL=[0.06, 0.06, 0.06, 0.04, 0.04, 0.02, 0.01]; XF=[1, 1, 1, 1, 1, 1, 1]
                SoilCrop ForageBrassicaSoil: LL=[0.2, 0.3, 0.33, 0.35, 0.3, 0.34, 0.34]; KL=[0.06, 0.06, 0.06, 0.04, 0.04, 0.02, 0.01]; XF=[1, 1, 1, 1, 1, 1, 1]
              WaterBalance SoilWater: SummerDate=1-Nov; SummerU=6; SummerCona=3.5; WinterDate=1-Apr; WinterU=4; WinterCona=2.5; DiffusConst=40; DiffusSlope=16; Salb=0.12; CN2Bare=73; CNRed=20; CNCov=0.8; PSIDul=-100; Thickness=[150, 150, 300, 300, 300, 300, 300]; SWCON=[0.3, 0.3, 0.3, 0.3, 0.3, 0.3, 0.3]
              CERESSoilTemperature Temperature
              Solute NO3: Thickness=[150, 150, 300, 300, 300, 300, 300]; InitialValues=[28.86, 31.08, 11.865, 8.142, 0, 0, 0]; InitialValuesUnits=ppm; WaterTableConcentration=0; D0=0; DepthConstant=0; MaxDepthSoluteAccessible=0; RunoffEffectivenessAtMovingSolute=0; MaxEffectiveRunoff=0
              Solute NH4: Thickness=[150, 150, 300, 300, 300, 300, 300]; InitialValues=[9.8, 9.8, 5.8, 5, 0, 0, 0]; InitialValuesUnits=ppm; WaterTableConcentration=0; D0=0; DepthConstant=0; MaxDepthSoluteAccessible=0; RunoffEffectivenessAtMovingSolute=0; MaxEffectiveRunoff=0
              Solute UREA: Thickness=[150, 150, 300, 300, 300, 300, 300]; InitialValues=[0, 0, 0, 0, 0, 0, 0]; InitialValuesUnits=kg/ha; WaterTableConcentration=0; D0=0; DepthConstant=0; MaxDepthSoluteAccessible=0; RunoffEffectivenessAtMovingSolute=0; MaxEffectiveRunoff=0
              Organic: FOMCNRatio=40; CarbonUnits=Total
                Thickness  Carbon  SoilCNRatio  FBiom  FInert  FOM
                150        1.19    12           0.04   0.4     347.129
                150        1.01    12           0.02   0.6     270.344
                300        0.45    12           0.02   0.8     163.972
                300        0.3     12           0.02   1       99.4541
                300        0.2     12           0.01   1       60.322
                300        0.16    12           0.01   1       36.5871
                300        0.17    12           0.01   1       22.1912
              Chemical: Thickness=[150, 150, 300, 300, 300, 300, 300]; PH=[8.2, 8.5, 8.6, 8.6, 7.4, 5.3, 5.3]; PHUnits=Water
                PH source: Estimated based on local knowledge
              Water: Thickness=[150, 150, 300, 300, 300, 300, 300]; InitialValues=[0.33, 0.39, 0.39, 0.34, 0.37, 0.36, 0.32]; FilledFromTop=false
              Nutrient
            Manager Fertilise topup
              FertiliserType = NO3N
              Threshold = 200
```csharp
using Models.Soils;
using APSIM.Shared.Utilities;
using Models.Soils.Nutrients;
using Models.PMF;
using Models.Core;
using System;
using Models.Soils.Nutrients;
namespace Models
{
    [Serializable]
    public class Script : Model
    {
        [Link] Clock Clock;
        [Link] Fertiliser Fertiliser;
        [Link(ByName=true)] Solute NO3;

        [Description("Type of fertiliser to apply? ")] 
        public Fertiliser.Types FertiliserType { get; set; }
    
        [Description("Threshold amount of NO3 to topup to (kg/ha)")]
        public double Threshold { get; set;}
        
        [EventSubscribe("DoManagement")]
        private void OnDoManagement(object sender, EventArgs e)
        {
            double Amount = Threshold - MathUtilities.Sum(NO3.kgha);
            Fertiliser.Apply(Amount: Amount, Type: FertiliserType);
        }
    }
}
```
  Folder Sensibility
    Experiment DetailedDynamics (disabled)
      Memo
        This test demonstrates the detailed dynamics within a simple simulation of conola growth and resource use.  This includes:

        * Dry matter and Nitrogen supply and demand for individual organs
        * Dry matter and Nitrogen content for live and dead components of each organ
        * Light interception for live and dead components for each organ
      Factors
        Permutation
          Factor Cv: Specification=[SowingRule].Script.CultivarName=Hyola575_CL
      Simulation DetailedDynamicsBase
        Clock: Start=2013-02-19; End=2013-12-31
        Summary summaryfile
        Weather: FileName=met\greenethorpe_min_adjusted_LT_new1.met
        SoilArbitrator
        MicroClimate: a_interception=0; b_interception=1; c_interception=0; d_interception=0; SoilHeatFluxFraction=0.4; MinimumHeightDiffForNewLayer=0; NightInterceptionFraction=0.5; ReferenceHeight=2
        Zone Paddock: Area=1; Slope=0; AspectAngle=0; Altitude=50
          Irrigation
          Fertiliser
          SurfaceOrganicMatter: InitialResidueName=wheat_stubble; InitialResidueType=wheat; InitialResidueMass=1000; InitialStandingFraction=0; InitialCPR=0; InitialCNR=80
          Plant Canola
          Manager
```csharp
using Models.Soils;
using System;
using Models.Core;
using Models.PMF;
namespace Models
{
    [Serializable]
    [System.Xml.Serialization.XmlInclude(typeof(Model))]
    public class Script : Model
    {
        [Link] Clock Clock;

        [EventSubscribe("StartOfSimulation")]
        private void OnSimulationCommencing(object sender, EventArgs e)
        {
            /*
                
                 dateset = 0
                 emer_date = 0
                 endjuv_date = 0
                 anth_date = 0
                 mat_date = 0
                 event = 0
                 cum_temp = 0
                 cum_swdef = 0
                 cum_days = 0
            
            */
        }
        [EventSubscribe("DoManagement")]
        private void OnDoManagement(object sender, EventArgs e)
        {
            /*
                
               if (daysaftersowing = 1) then
                  cum_temp = 0
                  cum_swdef = 0
                  cum_days = 0
               elseif (stagename = 'start_grain_fill' or
                             stagename = 'end_grain_fill' or
                             stagename = 'maturity' or
                             stagename = 'harvest_ripe') then
                  cum_temp = cum_temp + (maxt + mint) / 2
                  cum_swdef = cum_swdef + swdef_photo
                  cum_days = cum_days + 1
               endif
               ! calculate canola oil content
               if (cum_days > 0) then
                  avg_temp = cum_temp / cum_days
                  avg_swdef = cum_swdef / cum_days
                  if (avg_temp <= 14) then
                     oil_conc =  47
                  else
                     oil_conc = (47 - ((avg_temp - 14)*1.21)) - (1.91*(1 - avg_swdef^2))
                  endif
               else
                  oil_conc = 0
               endif
            if (canola.stagename = 'harvest_ripe' or canola.plant_status = 'dead') then
               canola harvest
               canola kill_crop
               canola end_crop
               dateset = 0
            endif
            
            */
        }
    }
}
```
          Manager Harvesting
```csharp
using Models.PMF.Phen;
using System;
using Models.Core;
using System.Collections.Generic;
using System.Text;
using Models.Soils;
using Models.PMF;
using Models;
using System.Xml.Serialization;
using APSIM.Shared.Utilities;

namespace Models
{
    [Serializable] 
    public class Script : Model
    {
        [Link] private Plant Canola;
        [Link(Type = LinkType.Path, Path = "[Canola].Phenology")]
        private Phenology phenology;
        [EventSubscribe("DoManagement")]
        private void OnDoManagement(object sender, EventArgs e)
        {
            if (phenology.CurrentPhase.Name == "Ripening")
            {
                Canola.Harvest();
                Canola.EndCrop();
            }
        }
    }
}
```
          Manager SowingRule
            SowDate = 23-Apr
            CultivarName = Monty
            SowingDepth = 30
            RowSpacing = 230
            Population = 40
```csharp
using APSIM.Shared.Utilities;
using Models.Utilities;
using Models.Soils;
using Models.PMF;
using Models.Core;
using System;

namespace Models
{
    [Serializable]
    public class Script : Model
    {
        [Link] Clock Clock;
        [Link] Fertiliser Fertiliser;
        [Link] Summary Summary;
        [Link] Soil Soil;
        [Link] Plant Canola;
        Accumulator accumulatedRain;
        
        [Description("Sowing date (d-mmm)")]
        public string SowDate { get; set; }
        [Description("Cultivar to be sown")]
        public string CultivarName { get; set; }
        [Description("Sowing depth (mm)")]
        public double SowingDepth { get; set; }
        [Description("Row spacing (mm)")]
        public double RowSpacing { get; set; }
        [Description("Plant population (/m2)")]
        public double Population { get; set; }
        


        [EventSubscribe("DoManagement")]
        private void OnDoManagement(object sender, EventArgs e)
        {
            if (DateUtilities.WithinDates(SowDate, Clock.Today, SowDate))
            {
                Canola.Sow(population: Population, cultivar: CultivarName, depth: SowingDepth, rowSpacing: RowSpacing);    
            }
        
        }
        
    }
}
```
          Manager Fertilise at sowing
            Crop = [Canola]
            FertiliserType = NH4N
            Amount = 35
```csharp
using Models.Soils;
using System;
using Models.Core;
using Models.PMF;
namespace Models
{
    [Serializable]
    public class Script : Model
    {
        [Link] Clock Clock;
        [Link] Fertiliser Fertiliser;
        
        [Description("Crop to be fertilised")]
        public IPlant Crop { get; set; }

        [Description("Type of fertiliser to apply? ")] 
        public Fertiliser.Types FertiliserType { get; set; }
    
        [Description("Amount of fertiliser to be applied (kg/ha)")]
        public double Amount { get; set; }
        
        [EventSubscribe("Sowing")]
        private void OnSowing(object sender, EventArgs e)
        {
            Model crop = sender as Model;
            if (Crop != null && crop.Name.ToLower() == (Crop as IModel).Name.ToLower())
                Fertiliser.Apply(Amount: Amount, Type: FertiliserType);
        }
    }
}
```
          Soil: SoilType=Greenethorpe; Site=Front paddock; NearestTown=Young; Region=Southern NSW; State=NSW; Latitude=0; Longitude=0; YearOfSampling=0; DataSource=Kirkegaard/Lilley
            Chemical: PHUnits=Water
              Thickness=[100, 100, 100, 100, 100, 100, 100, 100, 100, 100, 100, 100, 100, 100, 100, 100, 100, 100, 100, 100]
              PH=[5.8, 5.9, 6.6, 6.8, 7, 7.1, 7.2, 7.3, 7.4, 7.4, 7.6, 7.8, 8, 8.2, 8.3, 8.4, 8.4, 8.5, 8.5, 8.5]
            Water: RelativeTo=LL15; FilledFromTop=true
              Thickness=[100, 100, 100, 100, 100, 100, 100, 100, 100, 100, 100, 100, 100, 100, 100, 100, 100, 100, 100, 100]
              InitialValues=[0.225, 0.237, 0.262, 0.286, 0.338, 0.358, 0.354, 0.34, 0.338, 0.346, 0.347, 0.353, 0.356, 0.351, 0.277564, 0.252, 0.189, 0.189, 0.186, 0.186]
            Physical
              Thickness  BD    AirDry  LL15   DUL    SAT
              100        1.45  0.04    0.1    0.225  0.433
              100        1.5   0.04    0.138  0.237  0.414
              100        1.55  0.04    0.161  0.262  0.395
              100        1.5   0.053   0.161  0.286  0.414
              100        1.53  0.066   0.224  0.338  0.406
              100        1.55  0.079   0.227  0.358  0.395
              100        1.58  0.077   0.263  0.354  0.388
              100        1.6   0.075   0.264  0.34   0.376
              100        1.63  0.09    0.264  0.338  0.369
              100        1.65  0.106   0.264  0.346  0.357
              100        1.63  0.106   0.264  0.347  0.369
              100        1.6   0.106   0.266  0.353  0.376
              100        1.58  0.107   0.276  0.356  0.384
              100        1.55  0.109   0.271  0.351  0.395
              100        1.55  0.102   0.252  0.343  0.395
              100        1.55  0.095   0.252  0.339  0.395
              100        1.55  0.088   0.189  0.336  0.395
              100        1.55  0.081   0.189  0.324  0.395
              100        1.55  0.074   0.186  0.324  0.395
              100        1.55  0.068   0.186  0.324  0.395
              SoilCrop CanolaSoil
                LL=[0.1, 0.138, 0.161, 0.161, 0.224, 0.227, 0.263, 0.264, 0.264, 0.264, 0.264, 0.266, 0.276, 0.271, 0.252, 0.252, 0.189, 0.189, 0.186, 0.186]
                KL=[0.08, 0.08, 0.06, 0.06, 0.05, 0.04, 0.04, 0.04, 0.04, 0.04, 0.04, 0.03, 0.03, 0.02, 0.02, 0.01, 0.01, 0.01, 0.01, 0.01]
                XF=[1, 1, 1, 1, 1, 1, 1, 1, 1, 1, 1, 1, 1, 1, 1, 0.7, 0.5, 0.2, 0, 0]
            WaterBalance SoilWater: SummerDate=1-nov; SummerU=6; SummerCona=3.5; WinterDate=1-apr; WinterU=2; WinterCona=2; DiffusConst=44; DiffusSlope=16; Salb=0.13; CN2Bare=72; CNRed=20; CNCov=0.8; DischargeWidth=5; CatchmentArea=10; PSIDul=-100
              Thickness=[100, 100, 100, 100, 100, 100, 100, 100, 100, 100, 100, 100, 100, 100, 100, 100, 100, 100, 100, 100]
              SWCON=[0.8, 0.8, 0.8, 0.8, 0.8, 0.8, 0.8, 0.8, 0.8, 0.8, 0.8, 0.8, 0.8, 0.8, 0.8, 0.8, 0.6, 0.6, 0.6, 0.6]
            Organic: FOMCNRatio=60; CarbonUnits=Total
              Thickness  Carbon  SoilCNRatio  FBiom  FInert  FOM
              100        0.83    8            0.06   0.01    439.771
              100        0.35    8            0.05   0.01    378.5144
              100        0.33    8            0.04   0.31    325.7904
              100        0.22    8            0.03   0.35    280.4104
              100        0.22    8            0.02   0.4     241.3514
              100        0.22    8            0.01   0.45    207.7331
              100        0.19    8            0.01   0.5     178.7975
              100        0.17    8            0.01   0.6     153.8925
              100        0.15    8            0.01   0.7     132.4565
              100        0.12    8            0.01   0.8     114.0063
              100        0.11    8            0.01   0.9     98.1262
              100        0.1     8            0.01   0.99    84.458
              100        0.1     8            0.01   0.99    72.6937
              100        0.1     8            0.01   0.99    62.568
              100        0.1     8            0.01   0.99    53.8528
              100        0.1     8            0.01   0.99    46.3515
              100        0.08    8            0.01   0.99    39.8951
              100        0.06    8            0.01   0.99    34.3381
              100        0.05    8            0.01   0.99    29.555
              100        0.04    8            0.01   0.99    25.4383
            CERESSoilTemperature Temperature
            Nutrient
            Solute NO3: InitialValuesUnits=ppm; WaterTableConcentration=0; D0=0; DepthConstant=0; MaxDepthSoluteAccessible=0; RunoffEffectivenessAtMovingSolute=0; MaxEffectiveRunoff=0
              Thickness=[100, 100, 100, 100, 100, 100, 100, 100, 100, 100, 100, 100, 100, 100, 100, 100, 100, 100, 100, 100]
              InitialValues=[20.1, 6.88, 2.8, 2.8, 1.32, 1.32, 0.9, 0.9, 0.58, 0.58, 0.46, 0.46, 0.47, 0.47, 0.56, 0.56, 0.79, 0.79, 0.95, 0.95]
            Solute NH4: InitialValuesUnits=ppm; WaterTableConcentration=0; D0=0; DepthConstant=0; MaxDepthSoluteAccessible=0; RunoffEffectivenessAtMovingSolute=0; MaxEffectiveRunoff=0
              Thickness=[100, 100, 100, 100, 100, 100, 100, 100, 100, 100, 100, 100, 100, 100, 100, 100, 100, 100, 100, 100]
              InitialValues=[1.65, 0.21, 0.14, 0.14, 0.1, 0.1, 0.1, 0.1, 0.12, 0.12, 0.13, 0.13, 0.14, 0.14, 0.14, 0.14, 0.09, 0.09, 0.14, 0.14]
            Solute Urea: InitialValuesUnits=kg/ha; WaterTableConcentration=0; D0=0; DepthConstant=0; MaxDepthSoluteAccessible=0; RunoffEffectivenessAtMovingSolute=0; MaxEffectiveRunoff=0
              Thickness=[100, 100, 100, 100, 100, 100, 100, 100, 100, 100, 100, 100, 100, 100, 100, 100, 100, 100, 100, 100]
              InitialValues=[0, 0, 0, 0, 0, 0, 0, 0, 0, 0, 0, 0, 0, 0, 0, 0, 0, 0, 0, 0]
          Manager Fertilise on fixed dates
            FertiliserType = UreaN
            FertiliserDates = 30-mar
            Amount = 150
            AmountType = False
            script: same as in Validation.Tosari.Tosari2018.Tosari2018Base.paddock.Fertilise on fixed dates
          Manager Fertilise on fixed dates1
            FertiliserType = UreaN
            FertiliserDates = 30-jul
            Amount = 50
            AmountType = False
            script: same as in Validation.Tosari.Tosari2018.Tosari2018Base.paddock.Fertilise on fixed dates
          Report DailyReport: EventNames=[Clock].DoReport
            VariableNames:
              [Clock].Today
              [Canola].SowingData.Cultivar
              [Canola].Phenology.CurrentStageName
              [Weather].MeanT
              sum([Soil].Water.MM) as ProfileWater
              [Canola].AboveGround.Wt
              [Canola].AboveGroundLive.Wt
              [Canola].AboveGround.N
              [Canola].AboveGroundLive.N
              [Canola].AboveGroundLive.N*10 as UptakeNKgHA
              [canola].Grain.Wt
              [Canola].Grain.Live.Wt
              [Canola].Grain.N
              [Canola].Grain.NConc
              [Canola].Grain.Number
              [Canola].Grain.Size
              [Canola].Leaf.LAI
              [canola].Leaf.Live.Wt
              [canola].Leaf.Wt
              [canola].Leaf.SpecificArea
              [canola].Leaf.LiveNconc
              [canola].Leaf.Live.NConc
              [canola].Pod.NConc
              [Canola].Leaf.Dead.N
              [Canola].Leaf.Dead.NConc
              [Canola].Leaf.Dead.Wt
              [Canola].Leaf.Live.N
              [Canola].Leaf.Live.NConc
              [Canola].Root.Depth
              [Canola].Root.N
              [Canola].Root.Wt
              [Canola].Root.Nconc
              [Canola].Root.WaterUptake
              [Canola].Stem.N
              [Canola].Stem.NConc
              [Canola].Stem.Wt
              [Canola].Stem.Live.StorageWt
              [Canola].Structure.Height
              [SurfaceOrganicMatter].Wt
              sum([Soil].NO3.kgha) as TotalSoilNitrogen
              [Canola].Phenology.Stage
              [Clock].Today.Year
              [Canola].Leaf.DeadCohortNo
              [Canola].Leaf.GreenCohortNo
              [Canola].Leaf.SenescingCohortNo
              [Canola].Leaf.ExpandedCohortNo
          Report HarvestReport: EventNames=[Canola].Harvesting
            VariableNames:
              [Clock].Today
              [Canola].SowingData.Cultivar
              [Canola].AboveGroundLive.Wt
              [Canola].Grain.Wt
              [Canola].Phenology.CurrentStageName
              [Soil].Water.Volumetric
              [Soil].Water.MM
              sum([Soil].Water.MM) as ProfileWater
              sum([Soil].NO3.kgha) as TotalSoilNitrogen
              [Canola].Phenology.MaturityDAS
              [Canola].Phenology.Stage
              [Clock].Today.Year
          Report DetailedReport: EventNames=[Clock].DoReport
            VariableNames:
              [Clock].Today
              [Canola].Phenology.CurrentStageName
              [Canola].Leaf.Wt
              [Canola].Leaf.N
              [Canola].Leaf.Total.StructuralWt
              [Canola].Leaf.Total.StructuralN
              [Canola].Leaf.Live.StructuralWt
              [Canola].Leaf.Live.StructuralN
              [Canola].Leaf.Live.Wt
              [Canola].Leaf.Live.StructuralWt
              [Canola].Leaf.Live.N
              [Canola].Leaf.Live.NConc
              [Canola].Leaf.NConc
              [Canola].Leaf.MinimumNConc
              [Canola].Leaf.CriticalNConc
              [Canola].Leaf.MaximumNConc
              [Canola].Leaf.Senesced.Wt
              [Canola].Leaf.LAI
              [Canola].Leaf.DMSupply.Fixation
              [Canola].Leaf.Transpiration
              [Canola].Stem.Wt
              [Canola].Stem.Live.Wt
              [Canola].Stem.Live.N
              [Canola].Stem.Total.StructuralWt
              [Canola].Stem.Total.StructuralN
              [Canola].Stem.Live.StructuralWt
              [Canola].Stem.Live.StructuralN
              [Canola].Stem.N
              [Canola].Stem.Nconc
              [Canola].Stem.MinimumNConc
              [Canola].Stem.CriticalNConc
              [Canola].Stem.MaximumNConc
              [Canola].Shell.Wt
              [Canola].Shell.N
              [Canola].Shell.Total.StructuralWt
              [Canola].Shell.Total.StructuralN
              [Canola].Shell.Live.Wt
              [Canola].Shell.Live.N
              [Canola].Shell.Live.StructuralWt
              [Canola].Shell.Live.StructuralN
              [Canola].Shell.Nconc
              [Canola].Shell.MinimumNConc
              [Canola].Shell.CriticalNConc
              [Canola].Shell.MaximumNConc
              [Canola].Shell.Area.Index
              [Canola].Shell.DMSupply.Fixation
              [Canola].Shell.EnergyBalance.Transpiration
              [Canola].Grain.Wt
              [Canola].Grain.N
              [Canola].Grain.Nconc
              [Canola].Shell.Wt
              [Canola].Pod.Wt
              [Canola].Pod.N
              [Canola].Pod.NConc
              [Canola].Arbitrator.DM.TotalFixationSupply
              sum([Canola].Arbitrator.N.Fixation) as NFixed
              [Canola].Arbitrator.DM.TotalPlantDemand
              [Canola].Leaf.DMDemand.Total
              [Canola].Stem.DMDemand.Total
              [Canola].Shell.DMDemand.Total
              [Canola].Grain.DMDemand.Total
              [Canola].Root.DMDemand.Total
              [Canola].Shell.EnergyBalance.CoverTotal
              [Canola].Leaf.CoverTotal
              [Canola].CoverTotal
          Report SowingReport: EventNames=[Canola].Sowing
            VariableNames:
              [Clock].Today
              [Canola].SowingData.Cultivar
              [IWeather].Latitude
              [IWeather].Longitude
      Folder Leaf
        Memo
          These graphs demonstrate the development of live and dead leaf biomass over time, and the accumulation and retranslocation of N in the structural and non-structural pools as the plant develops.
      Folder Shell
        Memo
          These graphs demonstrate the development of live and dead shell biomass over time, and the accumulation and retranslocation of N in the structural and non-structural pools as the plant develops.
      Folder Stem
        Memo
          These graphs demonstrate the development of live and dead stem biomass over time, and the accumulation and retranslocation of N in the structural and non-structural pools as the plant develops.
      Folder Canopy
        Memo
          These graphs demonstrate the changing roles of leaf and pod in light interception, photosynthesis and transpiration over time
    Experiment CanolaGrazing (disabled)
      Memo
        This sensibility test performs a livestock grazing simulation for canola planted in March, and grazed in late May as a dual-purpose crop.
      Factors
        Permutation
          Factor StockingRate: Specification=[GrazeForageCrop].Script.StockingRate = 0,50,100
      Simulation CanolaGrazingBase
        Clock: Start=2008-03-01; End=2008-12-31
        Summary SummaryFile
        Weather: FileName=met\wagga_-35.05_147.30.met
        SoilArbitrator Soil Arbitrator
        Stock: RandSeed=9999
        Forages
          Parameters:
            Name                          IsLive  DigestibilityString  FractionConsumable  MinimumAmount  UseDigestibilityFromModel
            SurfaceOrganicMatter.Residue  true    0                    0                   0              false
            SurfaceOrganicMatter.Residue  false   0                    0                   0              false
            Canola.Root                   true    .7                   0                   0              false
            Canola.Root                   false   .3                   0                   0              false
            Canola.Leaf                   true    .7                   1                   0              false
            Canola.Leaf                   false   .3                   1                   0              false
            Canola.Grain                  true    0.7                  0                   0              false
            Canola.Grain                  false   0.3                  0                   0              false
            Canola.Stem                   true    0.7                  1                   0              false
            Canola.Stem                   false   0.3                  1                   0              false
            Canola.Shell                  true    0.7                  0                   0              false
            Canola.Shell                  false   0.3                  0                   0              false
        Supplement: SpoilageTime=0
          Stores:
            {Name=fodder, Stored=0, IsRoughage=true, DMContent=0.85, DMD=0, MEContent=0, CPConc=0, ProtDg=0, PConc=0, SConc=0, EEConc=0, ADIP2CP=0, AshAlk=0, MaxPassage=0}
        Manager GrazeForageCrop
          StockingRate = 20
          Genotype = Large Merino
          Sex = Male
          Age = 12
          Weight = 100
          Pregnant = 0
          Lactating = 0
          YoungNumber = 0
          YoungWt = 0
          CurrentLocation = Away
          PreGrazingDM = 1000
          PostGrazingDM = 500
          MinGrazingDays = 0
          DoNoGrazingWindow = True
          NoGrazeStart = 1-jun
          NoGrazeEnd = 20-may
          SupplementName =
          SupplementFirst = False
          SupplementEveryDay = 0
          SupplementOnPastureMass = 0
          TriggerPastureMass = 2100
```csharp
using Models.PMF.Interfaces;
using System.Diagnostics;
using Models.AgPasture;
using System.Linq;
using System.Collections.Generic;
using System.Collections;
using Models.Soils;
using Models.PMF;
using System.Xml.Serialization;
using APSIM.Shared.Utilities;
using Models.GrazPlan;
using Models.Utilities;
using Models.Core;
using Models;
using Models.ForageDigestibility;
using System;

namespace Models
{

    [Serializable]
    public class Script : Model
    {
        [Link] Clock clock;
        [Link] Stock stock;
        [Link] Supplement supplement;
        [Link] List<Zone> paddocks;
        [Link] ISummary summary;
        [Link] Simulation farm;
        [Link] Forages forages;

        private int CurrentGroupNum = 1;    // animal group number
        private int CurrentLocationNum { get; set; }

        [Separator("Stock type info, the same type of stock are brought onto the paddock at each grazing")]

        [Description("Stock: genotype (e.g. Small Merino, Angus, Friesian):")] 
        [Display(Values="GetGenotypes")]
        public string Genotype { get; set; }

        [Description("Stock: sex (Female, Male, Castrate):")] 
        public ReproductiveType Sex { get; set; }

        [Description("Stock: age (months):")] 
        public double Age { get; set; }

        [Description("Stock: weight (kg liveweight /head):")] 
        public double Weight { get; set; }

        [Description("Stock: fertility status (0 if non-pregnant or days since conception):")] 
        public int Pregnant { get; set; }

        [Description("Stock: lactation status (0 if non-lactating or days since parturition):")]
        public int Lactating { get; set; }

        [Description("Stock: number of unweaned young:")]
        public int YoungNumber { get; set; }

        [Description("Stock: weight of unweaned young:")] 
        public double YoungWt { get; set; }

        [Separator("Grazing event information")]

        [Description("Paddock stocking rate (head/ha): ")] 
        public double StockingRate { get; set; }

        [Description("Initial location of the cows (give either the paddock name or 'Away'): ")] 
        public string CurrentLocation { get; set; }

        [Description("Standing biomass at which to bring the stock into the simulation (kg DM/ha): ")] 
        public double PreGrazingDM { get; set; }

        [Description("Standing biomass at which to exit  stock from the simulation (kg DM/ha): ")] 
        public double PostGrazingDM { get; set; }

        [Description("Don't move the stock onto the crop unless there is approx. X days of grazable forage available: ")] 
        public int MinGrazingDays { get; set; }

        [Description("Implement a no-grazing window? (tick for yes): ")] 
        public bool DoNoGrazingWindow { get; set; }

        [Description("Start of the no-grazing window (dd-MMM)")] 
        public string NoGrazeStart { get; set; }

        [Description("End of the no-grazing window (dd-MMM)")] 
        public string NoGrazeEnd { get; set; }

        [Separator("Supplementary feeding")]

        [Description("Name of the supplement to feed: ")] 
        public string SupplementName { get; set; }

        [Description("Feed the supplement first (i.e. before the new forage is available to the stock)?: ")] 
        public bool SupplementFirst { get; set; }

        [Description("Amount of supplementary feeding offered every day (kg DM /head /day): ")] 
        public double SupplementEveryDay { get; set; }

        [Description("Additional amount of supplement offered when available biomass is low (kg DM /head /day): ")] 
        public double SupplementOnPastureMass { get; set; }

        [Description("Trigger biomass for above rule (kg DM /ha): ")] 
        public double TriggerPastureMass { get; set; }

        public int NumStock { get; set; }
        public bool GrazingSeasonIsOpen { get; set; } // number of cows on the whole farm
        public double HarvestableBiomass { get; set; }

        // Return a list of genotypes to the properties tab.
        public string[] GetGenotypes()
        {
            if (stock != null)
                return stock.Genotypes.Names.ToArray();
            return null;
        }

        [EventSubscribe("StartOfSimulation")]
        private void OnStartOfSimulation(object sender, EventArgs e)
        {

            //Debugger.Break();

            summary.WriteMessage(this, "Initialising the paddock information", MessageType.Diagnostic);

            NumStock = (int)(Math.Round(StockingRate * farm.Area, 0));

            if ((CurrentLocation.ToLower() != "away") && (NumStock > 0))
            {
                BuyStock();
                stock.Move(CurrentLocation);
                summary.WriteMessage(this, " The Stock have been moved to " + CurrentLocation, MessageType.Diagnostic);
            }

            summary.WriteMessage(this, "     The number of animals has been rounded to " + NumStock + " from " + (StockingRate * farm.Area), MessageType.Diagnostic);
            summary.WriteMessage(this, "     The animals will begin in " + CurrentLocation + " which is paddock number " + CurrentLocationNum + " in the simulation", MessageType.Diagnostic);
            summary.WriteMessage(this, "     The area of the whole farm is " + farm.Area + " ha", MessageType.Diagnostic);

        }

        [EventSubscribe("DoManagement")]
        private void OnDoManagement(object sender, EventArgs e)
        {
            GrazingSeasonIsOpen = true;
            if (DoNoGrazingWindow)
                GrazingSeasonIsOpen = !DateUtilities.WithinDates(NoGrazeStart, clock.Today, NoGrazeEnd);

            bool sellSomeStock = false;
            if (!GrazingSeasonIsOpen)
                sellSomeStock = true;

            // Calculate forage mass in the paddock
            HarvestableBiomass = 0.0;
            foreach (var forage in forages.ModelsWithDigestibleBiomass)
                foreach (var forageMaterial in forage.Material)
                    HarvestableBiomass += forageMaterial.Consumable.Wt;
            HarvestableBiomass *= 10;  // Convert to kg/ha

            if (HarvestableBiomass <= PostGrazingDM)
                sellSomeStock = true;

            if (CurrentLocation == "Away")
                sellSomeStock = false;

            double minFodder = 0.03 * MinGrazingDays * NumStock * Weight; // The 0.03 is the propostion of body mass that the stock might eat
            if (CurrentLocation == "Away" && NumStock > 0 && (HarvestableBiomass >= PreGrazingDM) && HarvestableBiomass >= (PostGrazingDM + minFodder) && GrazingSeasonIsOpen)
            {
                CurrentLocation = paddocks[0].Name;
                CurrentLocationNum = paddocks[0].Index;
                BuyStock();
                stock.Move(CurrentLocation);
                summary.WriteMessage(this, "     Buying stock ", MessageType.Diagnostic);
            }

            if (sellSomeStock)
            {
                CurrentLocation = "Away";
                CurrentLocationNum = -1;
                SellStock();
                summary.WriteMessage(this, "     Selling stock ", MessageType.Diagnostic);
            }

            if (CurrentLocation != "Away")
            {
                if (SupplementEveryDay > 0)
                {
                    double silageOnHand = supplement.Stores[2 - 1].Stored;
                    if (silageOnHand < SupplementEveryDay * stock.NumberAll)
                    {
                        supplement.Buy(SupplementEveryDay * 30.0 * stock.NumberAll, SupplementName);  // i.e. 1 months worth
                        summary.WriteMessage(this, "SupplementEveryDay: Buying " + SupplementName + " of total amount : " + (SupplementEveryDay * 90 * stock.NumberAll) + " kg DM", MessageType.Diagnostic);
                    }
                    supplement.Feed(SupplementName, SupplementEveryDay * stock.NumberAll, CurrentLocation, SupplementFirst);
                }

                if (SupplementOnPastureMass > 0 && HarvestableBiomass <= TriggerPastureMass)
                {
                    double silageOnHand = supplement.Stores[2 - 1].Stored;
                    if (silageOnHand < SupplementOnPastureMass * stock.NumberAll)
                    {
                        supplement.Buy(SupplementOnPastureMass * 30.0 * stock.NumberAll, SupplementName);  // i.e. 1 months worth
                        summary.WriteMessage(this, "SupplementOnBiomass: Buying " + SupplementName + " of total amount : " + (SupplementOnPastureMass * 90 * stock.NumberAll) + " kg DM", MessageType.Diagnostic);
                    }
                    supplement.Feed(SupplementName, SupplementOnPastureMass * stock.NumberAll, CurrentLocation, SupplementFirst);
                }
            }
        }


        public void BuyStock()
        {
            CurrentGroupNum = stock.NoGroups + 1;
            StockBuy purchase = new StockBuy();
            purchase.Genotype = Genotype;
            purchase.Number = NumStock;
            purchase.Sex = Sex;
            purchase.Age = Age;       // age in months
            purchase.Weight = Weight;  // live weight in kg
            purchase.UseTag = CurrentGroupNum + 1;
            purchase.MatedTo = purchase.Genotype;
            purchase.Pregnant = Pregnant;  // days pregnant, 0 = non pregnant, 1 = pregnant
            purchase.Lactating = Lactating;  // 0 for dry, 1 for lactating
            purchase.NumYoung = YoungNumber;
            purchase.YoungWt = YoungWt;

            stock.Buy(purchase);
        }

        public void SellStock()
        {
            int NumGroups = stock.NoGroups;

            NumGroups = stock.NoGroups;
            for (int gg = 1; gg <= NumGroups; gg++)
            {
                stock.Sell(stock.Number[gg - 1]);
            }
        }
    }
}
```
        MicroClimate: a_interception=0; b_interception=0; c_interception=0; d_interception=0; SoilHeatFluxFraction=0.4; MinimumHeightDiffForNewLayer=0; NightInterceptionFraction=0.5; ReferenceHeight=2
        Zone: Area=1; Slope=0; AspectAngle=0; Altitude=50
          Soil: SoilType=sand; Site=CSU; NearestTown=Wagga Wagga; Region=Southern NSW; State=NSW; Latitude=0; Longitude=0; YearOfSampling=0; DataSource=Kirsten Verburg; Comments=Greenethorpe
            Chemical: same as Sensibility.DetailedDynamics.DetailedDynamicsBase.Paddock.Soil.Chemical
            Water: RelativeTo=CanolaSoil; FilledFromTop=false
              Thickness=[100, 100, 100, 100, 100, 100, 100, 100, 100, 100, 100, 100, 100, 100, 100, 100, 100, 100, 100, 100]
              InitialValues=[0.127, 0.135, 0.151, 0.172, 0.19, 0.19, 0.219, 0.219, 0.247, 0.247, 0.265, 0.265, 0.275, 0.275, 0.285, 0.285, 0.285, 0.285, 0.285, 0.285]
            Physical
              Thickness  BD    AirDry  LL15  DUL   SAT
              100        1.48  0.03    0.11  0.28  0.34
              100        1.49  0.12    0.12  0.27  0.34
              100        1.41  0.14    0.14  0.25  0.32
              100        1.37  0.16    0.16  0.28  0.35
              100        1.41  0.18    0.18  0.28  0.35
              100        1.41  0.18    0.18  0.28  0.35
              100        1.52  0.21    0.21  0.3   0.34
              100        1.52  0.21    0.21  0.3   0.34
              100        1.62  0.24    0.24  0.31  0.33
              100        1.62  0.24    0.24  0.31  0.33
              100        1.66  0.26    0.26  0.31  0.34
              100        1.66  0.26    0.26  0.31  0.34
              100        1.62  0.27    0.27  0.32  0.34
              100        1.62  0.27    0.27  0.32  0.34
              100        1.62  0.28    0.28  0.33  0.36
              100        1.62  0.28    0.28  0.33  0.36
              100        1.62  0.28    0.28  0.33  0.36
              100        1.62  0.28    0.28  0.33  0.36
              100        1.62  0.28    0.28  0.33  0.36
              100        1.62  0.28    0.28  0.33  0.36
              SoilCrop CanolaSoil
                LL=[0.11, 0.12, 0.14, 0.16, 0.18, 0.18, 0.21, 0.21, 0.24, 0.24, 0.26, 0.26, 0.27, 0.27, 0.28, 0.28, 0.28, 0.28, 0.28, 0.28]
                KL=[0.06, 0.05, 0.05, 0.04, 0.04, 0.04, 0.04, 0.03, 0.03, 0.03, 0.03, 0.02, 0.02, 0.02, 0.01, 0.01, 0.01, 0.01, 0, 0]
                XF=[1, 1, 1, 1, 1, 1, 1, 1, 1, 1, 1, 1, 1, 1, 1, 1, 0.8, 0.4, 0, 0]
            WaterBalance SoilWater: same as Sensibility.DetailedDynamics.DetailedDynamicsBase.Paddock.Soil.SoilWater
            Organic: same as Sensibility.DetailedDynamics.DetailedDynamicsBase.Paddock.Soil.Organic
            CERESSoilTemperature Temperature
            Nutrient
            Solute NO3: same as Sensibility.DetailedDynamics.DetailedDynamicsBase.Paddock.Soil.NO3
            Solute NH4: same as Sensibility.DetailedDynamics.DetailedDynamicsBase.Paddock.Soil.NH4
            Solute Urea: same as Sensibility.DetailedDynamics.DetailedDynamicsBase.Paddock.Soil.Urea
          Report GrazingReport: EventNames=[Clock].DoReport
            VariableNames:
              [Clock].Today as Date
              [Stock].Paddock
              [Stock].NumberAll
              [Stock].WeightAll
              [Stock].IntakeAll.Weight
              [Canola].AboveGround.Wt
              [Canola].AboveGroundLive.Wt
              [Canola].Grain.Wt
              [Canola].Leaf.LAI
              [Canola].Leaf.Wt
              [Canola].Stem.Wt
              [SurfaceOrganicMatter].Wt
              [Canola].Leaf.Removed.StructuralWt
          Fertiliser
          SurfaceOrganicMatter: InitialResidueName=maize_stubble; InitialResidueType=maize; InitialResidueMass=0; InitialStandingFraction=0; InitialCPR=400; InitialCNR=60
          Plant Canola: PlantType=Canola; IsEnding=false; DaysAfterEnding=0
            Memo Title
              #The APSIM Canola Model
            OrganArbitrator Arbitrator
              BiomassTypeArbitrator DMArbitration
                Folder PotentialPartitioningMethods
                  ReallocationMethod
                  AllocateFixationMethod
                  RetranslocationMethod
                  SendPotentialDMAllocationsMethod
                Folder AllocationMethods
                  NutrientConstrainedAllocationMethod
                  DryMatterAllocationsMethod
                RelativeAllocation ArbitrationMethod
              BiomassTypeArbitrator NArbitration
                Folder PotentialPartitioningMethods
                  ReallocationMethod
                Folder ActualPartitioningMethods
                  AllocateFixationMethod
                  RetranslocationMethod
                Folder AllocationMethods
                  NitrogenAllocationsMethod
                RelativeAllocation ArbitrationMethod
                AllocateUptakesMethod
              WaterUptakeMethod
              NitrogenUptakeMethod
            Phenology
              HourlyInterpolation ThermalTime: agregationMethod=0
                XYPairs Response: X=[2, 30, 35]; Y=[0, 28, 0]
                ThreeHourSin InterpolationMethod
              MultiplyFunction PPModifiedThermalTime
                VariableReference ThermalTime: VariableName=[Phenology].ThermalTime
                LinearInterpolationFunction PhotoperiodModifier
                  XYPairs: X=[12, 16]; Y=[1, 1]
                  VariableReference XValue: VariableName=[Phenology].Photoperiod
              AccumulateFunction CumulativeThermalTime: StartStageName=Germination; EndStageName=FloralInitiation; FractionRemovedOnCut=0; FractionRemovedOnHarvest=0; FractionRemovedOnGraze=0; FractionRemovedOnPrune=0
                VariableReference DailyValue: VariableName=[Phenology].ThermalTime
              HourlyInterpolation VernalTime: agregationMethod=0
                XYPairs Response: X=[0, 2, 8, 15]; Y=[0, 1, 0.5, 0]
                ThreeHourSin InterpolationMethod
              AccumulateFunction CumulativeVernalTime: StartStageName=Germination; EndStageName=FloralInitiation; FractionRemovedOnCut=0; FractionRemovedOnHarvest=0; FractionRemovedOnGraze=0; FractionRemovedOnPrune=0
                VariableReference DailyValue: VariableName=[Phenology].VernalTime
              PhotoperiodFunction Photoperiod: Twilight=-6; DayLength=0
              GerminatingPhase Germinating: Start=Sowing; End=Germination
              EmergingPhase Emerging: Start=Germination; End=Emergence; TTForTimeStep=0
                VariableReference ThermalTime: VariableName=[Phenology].ThermalTime
                AddFunction Target
                  Constant ShootLag: FixedValue=15
                  MultiplyFunction DepthxRate
                    VariableReference SowingDepth: VariableName=[Plant].SowingData.Depth
                    Constant ShootRate: FixedValue=5
              GenericPhase Vegetative: Start=Emergence; End=FloralInitiation
                VariableReference Progression: VariableName=[Phenology].ThermalTime
                LinearInterpolationFunction Target
                  XYPairs: X=[0, 25]; Y=[290, 1]
                  VariableReference XValue: VariableName=[Phenology].CumulativeVernalTime
              SimpleLeafAppearancePhase BudDevelopment: Start=FloralInitiation; End=GreenBud
                VariableReference TargetLeafNumber: VariableName=[Leaf].FinalLeafNumber
                VariableReference CurrentLeafNumber: VariableName=[Leaf].NodeNumber
              GenericPhase StemElongation: Start=GreenBud; End=StartFlowering
                VariableReference Progression: VariableName=[Phenology].PPModifiedThermalTime
                AddFunction Target
                  Constant Base: FixedValue=250
                  MultiplyFunction PPResponse
                    Constant Amount: FixedValue=0
                    LinearInterpolationFunction Shape
                      XYPairs: X=[13, 14]; Y=[1, 0]
                      VariableReference XValue: VariableName=[Phenology].Photoperiod
              GenericPhase EarlyFlowering: Start=StartFlowering; End=StartPodDevelopment
                Memo
                  The duration of the grain filling phase has been taken from the model of Robertson et al (2002).
                Constant Target: FixedValue=100
                VariableReference Progression: VariableName=[Phenology].ThermalTime
              GenericPhase EarlyPodDevelopment: Start=StartPodDevelopment; End=StartGrainFilling
                Memo
                  The duration of the grain filling phase has been taken from the model of Robertson et al (2002).
                Constant Target: FixedValue=140
                VariableReference Progression: VariableName=[Phenology].ThermalTime
                VariableReference Stress: VariableName=[Phenology].Vegetative.PhotoperiodEffect
              GenericPhase EarlyGrainFilling: Start=StartGrainFilling; End=EndFlowering
                VariableReference Progression: VariableName=[Phenology].ThermalTime
                VariableReference Stress: VariableName=[Phenology].Vegetative.PhotoperiodEffect
                MultiplyFunction Target
                  Constant FractionofGrainfilling: FixedValue=0.05
                  VariableReference EntireGrainfilling
                    VariableName=[Phenology].LateGrainFilling.Target.EntireGrainfillPeriod.FixedValue
              GenericPhase MidGrainFilling: Start=EndFlowering; End=EndPodDevelopment
                VariableReference Progression: VariableName=[Phenology].ThermalTime
                VariableReference Stress: VariableName=[Phenology].Vegetative.PhotoperiodEffect
                HourlyInterpolation ThermalTimeNew: agregationMethod=0
                  XYPairs Response: X=[5, 20, 30, 40]; Y=[0, 10, 20, 0]
                  ThreeHourSin InterpolationMethod
                MultiplyFunction Target
                  Constant FractionofMidToLateGrainfilling: FixedValue=0.5
                  SubtractFunction
                    VariableReference EntireGrainfilling
                      VariableName=[Phenology].LateGrainFilling.Target.EntireGrainfillPeriod.FixedValue
                    VariableReference EarlyGrainfilling: VariableName=[Phenology].EarlyGrainFilling.Target
              GenericPhase LateGrainFilling: Start=EndPodDevelopment; End=EndGrainFill
                SubtractFunction Target
                  Constant EntireGrainfillPeriod: FixedValue=700
                  VariableReference EarlyGrainFillingTarget: VariableName=[Phenology].EarlyGrainFilling.Target
                  VariableReference MidGrainFillingTarget: VariableName=[Phenology].MidGrainFilling.Target
                VariableReference Progression: VariableName=[Phenology].ThermalTime
                VariableReference Stress: VariableName=[Phenology].Vegetative.PhotoperiodEffect
                HourlyInterpolation ThermalTimeNew: agregationMethod=0
                  XYPairs Response: X=[5, 20, 30, 40]; Y=[0, 10, 20, 0]
                  ThreeHourSin InterpolationMethod
              GenericPhase Maturing: Start=EndGrainFill; End=Maturity
                Constant Target: FixedValue=5
                VariableReference Progression: VariableName=[Phenology].ThermalTime
              GenericPhase Ripening: Start=Maturity; End=HarvestRipe
                Constant Target: FixedValue=1
                VariableReference Progression: VariableName=[Phenology].ThermalTime
              EndPhase ReadyForHarvesting: Start=HarvestRipe; End=Unused
                VariableReference ThermalTime: VariableName=[Phenology].ThermalTime
              OnEventFunction EmergenceDAS: SetEvent=Emergence; ReSetEvent=never
                Memo
                  A function is used to provide maturity date as days after sowing(DAS).
                Constant PreEventValue: FixedValue=0
                VariableReference PostEventValue: VariableName=[Plant].DaysAfterSowing
              OnEventFunction FloralInitiationDAS: SetEvent=FloralInitiation; ReSetEvent=never
                Memo
                  A function is used to provide flowering date as days after sowing(DAS).
                Constant PreEventValue: FixedValue=0
                VariableReference PostEventValue: VariableName=[Plant].DaysAfterSowing
              OnEventFunction GreenBudDAS: SetEvent=GreenBud; ReSetEvent=never
                Memo
                  A function is used to provide flowering date as days after sowing(DAS).
                Constant PreEventValue: FixedValue=0
                VariableReference PostEventValue: VariableName=[Plant].DaysAfterSowing
              OnEventFunction StartFloweringDAS: SetEvent=StartFlowering; ReSetEvent=never
                Memo
                  A function is used to provide flowering date as days after sowing(DAS).
                Constant PreEventValue: FixedValue=0
                VariableReference PostEventValue: VariableName=[Plant].DaysAfterSowing
              OnEventFunction MaturityDAS: SetEvent=Maturity; ReSetEvent=never
                Memo
                  A function is used to provide maturity date as days after sowing(DAS).
                Constant PreEventValue: FixedValue=0
                VariableReference PostEventValue: VariableName=[Plant].DaysAfterSowing
            Root: GrowthRespiration=0; MaintenanceRespiration=0
              RootShapeCylinder RootShape
              LinearInterpolationFunction KLModifier
                XYPairs: X=[0, 3]; Y=[1, 1]
                VariableReference XValue: VariableName=[Leaf].LAI
              HourlyInterpolation TemperatureEffect: agregationMethod=0
                XYPairs Response: X=[0, 20, 32]; Y=[0, 1, 0]
                ThreeHourSin InterpolationMethod
              Constant MaxDailyNUptake: FixedValue=6
              Constant SenescenceRate: FixedValue=0.005
              Constant MaximumRootDepth: FixedValue=1000000
              PhaseLookup RootFrontVelocity
                PhaseLookupValue PreEmergence: Start=Germination; End=Emergence
                  Constant Function: FixedValue=5
                PhaseLookupValue early: Start=Emergence; End=StartGrainFilling
                  Constant Function: FixedValue=44
                PhaseLookupValue late: Start=StartGrainFilling; End=Maturity
                  Constant Function: FixedValue=0
              Constant MaximumNConc: FixedValue=0.01
              Constant MinimumNConc: FixedValue=0.005
              PhaseLookupValue NitrogenDemandSwitch: Start=Emergence; End=EndGrainFill
                Constant: FixedValue=1
              LinearInterpolationFunction KNO3
                XYPairs: X=[0, 0.003]; Y=[0.01, 0.01]
                VariableReference XValue: VariableName=[Root].LengthDensity
              LinearInterpolationFunction KNH4
                XYPairs: X=[0, 0.003]; Y=[0, 0]
                VariableReference XValue: VariableName=[Root].LengthDensity
              BiomassRemoval BiomassRemovalDefaults
                OrganBiomassRemovalType Harvest: FractionLiveToRemove=0; FractionDeadToRemove=0; FractionLiveToResidue=0.2; FractionDeadToResidue=0
                OrganBiomassRemovalType Cut: FractionLiveToRemove=0; FractionDeadToRemove=0; FractionLiveToResidue=0.3; FractionDeadToResidue=0
                OrganBiomassRemovalType Prune: FractionLiveToRemove=0; FractionDeadToRemove=0; FractionLiveToResidue=0.1; FractionDeadToResidue=0
                OrganBiomassRemovalType Graze: FractionLiveToRemove=0; FractionDeadToRemove=0; FractionLiveToResidue=0.15; FractionDeadToResidue=0
              LinearInterpolationFunction NUptakeSWFactor
                XYPairs: X=[0, 1]; Y=[0, 1]
                VariableReference XValue: VariableName=[Root].RWC
              Constant SpecificRootLength: FixedValue=40; Units=m/g
              Constant DMConversionEfficiency: FixedValue=1
              Constant MaintenanceRespirationFunction: FixedValue=1
              Constant RemobilisationCost: FixedValue=0
              Constant CarbonConcentration: FixedValue=0.4
              NutrientDemandFunctions DMDemands
                MultiplyFunction Structural
                  PartitionFractionDemandFunction DMDemandFunction
                    PhaseLookup PartitionFraction
                      PhaseLookupValue Early: Start=Emergence; End=StartFlowering
                        Constant Function: FixedValue=0.2
                      PhaseLookupValue Middle: Start=StartFlowering; End=StartGrainFilling
                        Constant Function: FixedValue=0.1
                      PhaseLookupValue Late: Start=StartGrainFilling; End=Maturity
                        Constant Function: FixedValue=0
                  Constant StructuralFraction: FixedValue=1
                Constant Metabolic: FixedValue=0
                StorageDMDemandFunction Storage
                  SubtractFunction StorageFraction
                    Constant One: FixedValue=1
                    VariableReference StructuralFraction: VariableName=[Root].DMDemands.Structural.StructuralFraction
                Constant QStructuralPriority: FixedValue=1
                Constant QMetabolicPriority: FixedValue=1
                Constant QStoragePriority: FixedValue=1
              NutrientDemandFunctions NDemands
                MultiplyFunction Structural
                  VariableReference MinNconc: VariableName=[Root].minimumNconc
                  VariableReference PotentialDMAllocation: VariableName=[Root].potentialDMAllocation.Structural
                MultiplyFunction Metabolic
                  SubtractFunction MetabolicNconc
                    VariableReference CritNconc: VariableName=[Root].criticalNConc
                    VariableReference MinNconc: VariableName=[Root].minimumNconc
                  VariableReference PotentialDMAllocation: VariableName=[Root].potentialDMAllocation.Structural
                StorageNDemandFunction Storage
                  VariableReference NitrogenDemandSwitch: VariableName=[Root].nitrogenDemandSwitch
                  VariableReference MaxNconc: VariableName=[Root].maximumNconc
                Constant QStructuralPriority: FixedValue=1
                Constant QMetabolicPriority: FixedValue=1
                Constant QStoragePriority: FixedValue=1
              VariableReference CriticalNConc: VariableName=[Root].MinimumNConc
              NutrientPoolFunctions InitialWt
                Constant Structural: FixedValue=0.2; Units=g/plant
                Constant Metabolic: FixedValue=0
                Constant Storage: FixedValue=0
              Constant RootDepthStressFactor: FixedValue=1
            SimpleLeaf Leaf: Albedo=0.25; Gsmax350=0.015; R50=150; LeafInitialisationStage=Emergence; Height=0; BaseHeight=0; Width=0; FRGR=0; PotentialEP=0; WaterDemand=0; KDead=0.3; LAIDead=0
              PhaseLookup ThermalTime
                PhaseLookupValue Vegetative: Start=Sowing; End=FloralInitiation
                  VariableReference Value: VariableName=[Phenology].ThermalTime
                PhaseLookupValue Reproductive: Start=FloralInitiation; End=StartFlowering
                  VariableReference Value: VariableName=[Phenology].PPModifiedThermalTime
              RUEModel Photosynthesis
                MultiplyFunction RUE
                  Constant Potential: FixedValue=1.69
                    Memo
                      This approach is based upon the value used in [robertson_simulation_2002] increased to account for partitioning to roots.
                  Constant TriazineToleranceModifier: FixedValue=1
                WeightedTemperatureFunction FT: MaximumTemperatureWeighting=0.75
                  Memo
                    This approach is based upon that used in Bell, WRight and Hammer (1992) Crop Sci
                  XYPairs: X=[0, 10, 22, 30]; Y=[0, 1, 1, 0]
                LinearInterpolationFunction FVPD
                  XYPairs: X=[0, 10, 50]; Y=[1, 1, 1]
                  VariableReference XValue: VariableName=[Leaf].Photosynthesis.VPD
                LinearInterpolationFunction FN
                  XYPairs: X=[0, 1, 1.5]; Y=[0, 1, 1]
                  VariableReference XValue: VariableName=[Leaf].Fn
                LinearInterpolationFunction FW
                  XYPairs: X=[0, 1]; Y=[0, 1]
                  VariableReference XValue: VariableName=[Leaf].Fw
                RUECO2Function FCO2: PhotosyntheticPathway=C3
                VariableReference RadnInt: VariableName=[Leaf].RadiationIntercepted
              StomatalConductanceCO2Modifier
                VariableReference PhotosynthesisCO2Modifier: VariableName=[Leaf].Photosynthesis.FCO2
              MaximumFunction Area
                AddFunction Calculation
                  MultiplyFunction Initial
                    Constant AreaPerPlant: FixedValue=0.0005
                    VariableReference Population: VariableName=[Canola].SowingData.Population
                  SubtractFunction Change
                    AccumulateAtEvent AreaGrowth: StartStageName=Emergence; EndStageName=StartFlowering; AccumulateEventName=[Clock].DoActualPlantGrowth
                      MultiplyFunction DeltaArea
                        VariableReference DeltaMass: VariableName=[Leaf].Allocated.StructuralWt
                        VariableReference SLA: VariableName=[Leaf].SpecificArea
                    AccumulateAtEvent AreaLoss: StartStageName=Emergence; EndStageName=HarvestRipe; AccumulateEventName=[Clock].DoActualPlantGrowth
                      MultiplyFunction DeltaArea
                        AddFunction DeltaMass
                          VariableReference DeltaSenesced: VariableName=[Leaf].Senesced.StructuralWt
                          VariableReference DeltaRemoved: VariableName=[Leaf].Removed.StructuralWt
                        VariableReference SLA: VariableName=[Leaf].SpecificAreaCanopy
                Constant Zero: FixedValue=0
              MinimumFunction FRGR
                VariableReference RUE_FT: VariableName=[Leaf].Photosynthesis.FT
                MinimumFunction Others
                  VariableReference RUE_FN: VariableName=[Leaf].Photosynthesis.FN
                  VariableReference RUE_FVPD: VariableName=[Leaf].Photosynthesis.FVPD
              Constant ExtinctionCoefficient: FixedValue=0.6
              LinearInterpolationFunction Tallness
                XYPairs: X=[1, 2, 3, 4, 5, 6, 9]; Y=[0, 0, 50, 400, 700, 900, 1000]
                VariableReference XValue: VariableName=[Phenology].Stage
              AddFunction NodeNumber
                Constant Initial: FixedValue=0
                AccumulateFunction Change: StartStageName=Emergence; EndStageName=GreenBud; FractionRemovedOnCut=1; FractionRemovedOnHarvest=1; FractionRemovedOnGraze=1; FractionRemovedOnPrune=0
                  DivideFunction DeltaNode
                    VariableReference ThermalTime: VariableName=[Leaf].ThermalTime
                    VariableReference Phyllochron: VariableName=[Leaf].Phyllochron
              AddFunction BranchNumber
                Constant One: FixedValue=1
                AccumulateFunction CumulativeBranching: StartStageName=Emergence; EndStageName=GreenBud; FractionRemovedOnCut=1; FractionRemovedOnHarvest=1; FractionRemovedOnGraze=1; FractionRemovedOnPrune=0
                  MultiplyFunction DeltaBranch
                    VariableReference DeltaNode: VariableName=[Leaf].NodeNumber.Change.DeltaNode
                    VariableReference BranchingRate: VariableName=[Leaf].BranchingRate
                    MaximumFunction CoverFactor
                      LinearInterpolationFunction Factor
                        XYPairs: X=[0, 0.3, 0.35, 1]; Y=[1, 1, 0, 0]
                        VariableReference XValue: VariableName=[Leaf].CoverTotal
                      Constant Zero: FixedValue=0
                    LinearInterpolationFunction WaterFactor
                      XYPairs: X=[0.8, 1]; Y=[0, 1]
                      VariableReference XValue: VariableName=[Leaf].Fw
                    WeightedTemperatureFunction TemperatureFactor: MaximumTemperatureWeighting=0.5
                      Memo
                        This approach is based upon that used in Bell, WRight and Hammer (1992) Crop Sci
                      XYPairs: X=[0, 12, 22, 30]; Y=[0, 1, 1, 0]
              AccumulateFunction Number: StartStageName=Emergence; EndStageName=GreenBud; FractionRemovedOnCut=1; FractionRemovedOnHarvest=1; FractionRemovedOnGraze=1; FractionRemovedOnPrune=0
                MultiplyFunction DailyNumberIncrease
                  VariableReference DeltaNode: VariableName=[Leaf].NodeNumber.Change.DeltaNode
                  VariableReference BranchNumber: VariableName=[Leaf].BranchNumber
                  VariableReference PlantNumber: VariableName=[Canola].SowingData.Population
              Constant NReallocationFactor: FixedValue=0.5
                Memo
                  This model assumes that all metabolic and storage N is available for reallocation from senescing leaves.
              PhaseLookup SenescenceRate
                PhaseLookupValue Vegetative: Start=Emergence; End=StartFlowering
                  MaximumFunction Rate
                    MultiplyFunction AgeSenescence
                      LinearInterpolationFunction Multiplier
                        XYPairs: X=[9, 10]; Y=[0, 1]
                        VariableReference XValue: VariableName=[Leaf].NodeNumber
                      DivideFunction LeavesPerDay
                        VariableReference ThermalTime: VariableName=[Leaf].ThermalTime
                        VariableReference Phyllochron: VariableName=[Leaf].Phyllochron
                        VariableReference NodeNumber: VariableName=[Leaf].NodeNumber
                      Constant: FixedValue=0
                    LinearInterpolationFunction ShadeSenescence
                      XYPairs: X=[1, 5, 8]; Y=[0, 0, 0.03]
                      VariableReference XValue: VariableName=[Leaf].LAI
                PhaseLookupValue Reproductive: Start=StartFlowering; End=EndPodDevelopment
                  Memo
                    Leaf senescence rate is calculated to ensure that all leaves are senesced by crop maturity.
                  BoundFunction Rate
                    DivideFunction Fraction
                      VariableReference TT: VariableName=[Phenology].ThermalTime
                      SubtractFunction TTRemaining
                        ExpressionFunction TTRequired
                          Expression=[Phenology].EarlyFlowering.Target + [Phenology].EarlyPodDevelopment.Target + [Phenology].EarlyGrainFilling.Target+[Phenology].MidGrainFilling.Target
                        ExpressionFunction TTComplete
                          Expression=[Phenology].EarlyFlowering.ProgressThroughPhase + [Phenology].EarlyPodDevelopment.ProgressThroughPhase + [Phenology].EarlyGrainFilling.ProgressThroughPhase+[Phenology].MidGrainFilling.ProgressThroughPhase
                      Constant Modifier: FixedValue=1
                    Constant Lower: FixedValue=0
                    Constant Upper: FixedValue=1
                PhaseLookupValue Senescent: Start=EndPodDevelopment; End=HarvestRipe
                  Memo
                    Leaf senescence rate is calculated to ensure that all leaves are senesced by crop maturity.
                  Constant Rate: FixedValue=0.1
              Constant DetachmentRate: FixedValue=0.05; Units=/d
              MultiplyFunction InitialWt
                Constant MassPerPlant: FixedValue=0.06
                VariableReference Population: VariableName=[Canola].SowingData.Population
              MultiplyFunction LAIDead
                VariableReference SLA: VariableName=[Leaf].SpecificAreaCanopy
                VariableReference LeafDeadWt: VariableName=[Leaf].Dead.Wt
              LinearInterpolationFunction MaximumNConc
                XYPairs: X=[1, 3, 8]; Y=[0.06, 0.035, 0.03]
                VariableReference XValue: VariableName=[Leaf].NodeNumber
              VariableReference CriticalNConc: VariableName=[Leaf].MaximumNConc
              Constant MinimumNConc: FixedValue=0.02
              Constant MaintenanceRespiration: FixedValue=0; Units=0-1
              Constant DMConversionEfficiency: FixedValue=1; Units=0-1
              BiomassRemoval BiomassRemovalDefaults
                OrganBiomassRemovalType Harvest: FractionLiveToRemove=0; FractionDeadToRemove=0; FractionLiveToResidue=1; FractionDeadToResidue=1
                OrganBiomassRemovalType Cut: FractionLiveToRemove=0; FractionDeadToRemove=0; FractionLiveToResidue=1; FractionDeadToResidue=1
                OrganBiomassRemovalType Prune: FractionLiveToRemove=0; FractionDeadToRemove=0; FractionLiveToResidue=0; FractionDeadToResidue=0
                OrganBiomassRemovalType Graze: FractionLiveToRemove=0; FractionDeadToRemove=0; FractionLiveToResidue=0; FractionDeadToResidue=0
              Constant NRetranslocationFactor: FixedValue=0.5
              Constant DMReallocationFactor: FixedValue=0
              Constant DMRetranslocationFactor: FixedValue=0.5
              Constant RemobilisationCost: FixedValue=0
              Constant CarbonConcentration: FixedValue=0.4
              NutrientDemandFunctions DMDemands
                DivideFunction Structural
                  VariableReference DeltaLAI: VariableName=[Leaf].DeltaLAI
                  VariableReference SLA: VariableName=[Leaf].SpecificArea
                  Memo
                    Growth in leaf area is used to calculate the leaf dry matter demand.  Note that leaf biomass is assumed to consist of entirely structural dry matter.
                Constant Storage: FixedValue=0
                Constant Metabolic: FixedValue=0
                Constant QStructuralPriority: FixedValue=1
                Constant QMetabolicPriority: FixedValue=1
                Constant QStoragePriority: FixedValue=1
              NutrientDemandFunctions NDemands
                MultiplyFunction Structural
                  VariableReference MinNconc: VariableName=[Leaf].minimumNconc
                  VariableReference PotentialDMAllocation: VariableName=[Leaf].potentialDMAllocation.Structural
                MultiplyFunction Metabolic
                  SubtractFunction MetabolicNconc
                    VariableReference CritNconc: VariableName=[Leaf].criticalNConc
                    VariableReference MinNconc: VariableName=[Leaf].minimumNconc
                  VariableReference PotentialDMAllocation: VariableName=[Leaf].potentialDMAllocation.Structural
                StorageNDemandFunction Storage
                  Constant NitrogenDemandSwitch: FixedValue=1
                  VariableReference MaxNconc: VariableName=[Leaf].maximumNconc
                Constant QStructuralPriority: FixedValue=1
                Constant QMetabolicPriority: FixedValue=1
                Constant QStoragePriority: FixedValue=1
              LinearInterpolationFunction FrostFraction
                XYPairs: X=[-4, 4]; Y=[1, 1]
                VariableReference XValue: VariableName=[Weather].MinT
              PhaseLookup DeltaLAI
                PhaseLookupValue Vegetative: Start=Emergence; End=StartFlowering
                  MultiplyFunction Delta
                    VariableReference AreaLargestLeaf: VariableName=[Leaf].AreaLargestLeaf
                    LinearInterpolationFunction RelativeArea
                      Memo
                        This approach is based upon that used in [robertson_simulation_2002].
                      XYPairs: X=[1, 2, 3, 4, 8]; Y=[0.03, 0.06, 0.012, 0.25, 1]
                      VariableReference XValue: VariableName=[Leaf].NodeNumber
                    LinearInterpolationFunction StageFactoor
                      Memo
                        This approach is based upon that used in [robertson_simulation_2002].
                      XYPairs: X=[3, 4, 5, 5.2]; Y=[1, 1, 1, 0.1]
                      VariableReference XValue: VariableName=[Phenology].Stage
                    VariableReference PlantNumber: VariableName=[Canola].SowingData.Population
                    VariableReference BranchNumber: VariableName=[Leaf].BranchNumber
                    DivideFunction LAR
                      VariableReference TT: VariableName=[Leaf].ThermalTime
                      VariableReference Phyllochron: VariableName=[Leaf].Phyllochron
                    VariableReference NitrogenFactor: VariableName=[Leaf].FNmetabolic
                    WeightedTemperatureFunction TemperatureFactor: same as Sensibility.CanolaGrazing.CanolaGrazingBase.Zone.Canola.Leaf.BranchNumber.CumulativeBranching.DeltaBranch.TemperatureFactor
                PhaseLookupValue Reproductive: Start=StartFlowering; End=Maturity
                  Constant: FixedValue=0
              Constant SpecificArea: FixedValue=0.025; Units=m^2/g
              Constant AreaLargestLeaf: FixedValue=0.015
              DivideFunction SpecificAreaCanopy
                VariableReference LAI: VariableName=[Leaf].Area
                VariableReference LeafWt: VariableName=[Leaf].Live.Wt
              LinearInterpolationFunction BranchingRate
                Memo
                  From Hammer Paper
                XYPairs: X=[0, 6.9, 7, 8, 9]; Y=[0, 0, 1, 1, 0]
                VariableReference XValue: VariableName=[Leaf].NodeNumber
              HoldFunction FinalLeafNumber: WhenToHold=FloralInitiation
                AddFunction FLN
                  Constant PrimordiaAtEmergence: FixedValue=3
                  AccumulateFunction InitiatedPrimordia: StartStageName=Germination; EndStageName=FloralInitiation; FractionRemovedOnCut=1; FractionRemovedOnHarvest=1; FractionRemovedOnGraze=1; FractionRemovedOnPrune=0
                    DivideFunction DailyPrimordiaAppearance
                      VariableReference TT: VariableName=[Phenology].ThermalTime
                      VariableReference Plastochron: VariableName=[Leaf].Plastochron
              Constant PlastochronOLD: FixedValue=40
              VariableReference PlastochronOLD2: VariableName=[Leaf].Phyllochron
              ExpressionFunction Plastochron: Expression=[Leaf].Phyllochron * [Leaf].Plastochron.Multiplier
                Constant Multiplier: FixedValue=0.8
              MultiplyFunction Phyllochron
                Constant Base: FixedValue=56
                LinearInterpolationFunction Multiplier
                  XYPairs: X=[1, 7, 8, 9]; Y=[1, 1, 0.45, 0.45]
                  VariableReference XValue: VariableName=[Leaf].NodeNumber
              ExpressionFunction TrueLeafNumber: Expression=[Leaf].NodeNumber - 1
            ReproductiveOrgan Grain: GrowthRespiration=0; MaintenanceRespiration=0
              Biomass Live
              Biomass Dead
              AddFunction FillingDuration
                VariableReference EarlyGrainFillingDuration: VariableName=[Phenology].EarlyGrainFilling.Target
                VariableReference MidGrainFillingDuration: VariableName=[Phenology].MidGrainFilling.Target
                VariableReference LateGrainFillingDuration: VariableName=[Phenology].LateGrainFilling.Target
              PhaseLookup DMDemandFunction
                PhaseLookupValue GrainFilling: Start=StartGrainFilling; End=EndGrainFill
                  MultiplyFunction HIGrainDemand
                    VariableReference AboveGroundWt: VariableName=[AboveGround].Wt
                    DivideFunction HarvestIndexIncrease
                      MaximumFunction OutstandingHarvestIndexIncrease
                        ExpressionFunction Increase: Expression=[Grain].PotentialHarvestIndex - [Grain].HarvestIndex
                        Constant Zero: FixedValue=0
                      SubtractFunction TTRemaining
                        ExpressionFunction ReproductiveTT
                          Expression=[Phenology].EarlyGrainFilling.Target+[Phenology].MidGrainFilling.Target+[Phenology].LateGrainFilling.Target
                        ExpressionFunction ReproductiveTTComplete
                          Expression=[Phenology].EarlyGrainFilling.ProgressThroughPhase+[Phenology].MidGrainFilling.ProgressThroughPhase+[Phenology].LateGrainFilling.ProgressThroughPhase
                    VariableReference ThermalTime: VariableName=[Phenology].ThermalTime
              Constant MinimumNConc: FixedValue=0.05
              Constant MaximumNConc: FixedValue=0.058
              Constant WaterContent: FixedValue=0.13
              MultiplyFunction NFillingRate
                VariableReference NConc: VariableName=[Grain].MaximumNConc
                VariableReference DMDemand: VariableName=[Grain].DMDemandFunction
                VariableReference DMConversionEfficiency: VariableName=[Grain].DMConversionEfficiency
              BiomassRemoval BiomassRemovalDefaults
                OrganBiomassRemovalType Harvest: FractionLiveToRemove=1; FractionDeadToRemove=1; FractionLiveToResidue=0; FractionDeadToResidue=0
                OrganBiomassRemovalType Cut: FractionLiveToRemove=0; FractionDeadToRemove=0; FractionLiveToResidue=1; FractionDeadToResidue=1
                OrganBiomassRemovalType Prune: FractionLiveToRemove=0; FractionDeadToRemove=0; FractionLiveToResidue=0; FractionDeadToResidue=0
                OrganBiomassRemovalType Graze: FractionLiveToRemove=0; FractionDeadToRemove=0; FractionLiveToResidue=0; FractionDeadToResidue=0
              Constant DMConversionEfficiency: FixedValue=0.89
              Constant RemobilisationCost: FixedValue=0
              Constant CarbonConcentration: FixedValue=0.4
              DivideFunction HarvestIndex
                VariableReference GrainWt: VariableName=[Grain].Wt
                VariableReference AboveGroundWt: VariableName=[AboveGround].Wt
              Constant MaximumPotentialGrainSize: FixedValue=0.0038
                Memo
                  This parameter is only used to provide a very approximate estimate of final grain number.  Grain growth is calculated from harvest index increase.
              MultiplyFunction PotentialHarvestIndex
                VariableReference PodHarvestIndex: VariableName=[Pod].PotentialHarvestIndex
                Constant GrainFraction: FixedValue=0.72; Units=0-1
              NutrientPoolFunctions DMDemandPriorityFactors
                Constant Structural: FixedValue=1
                Constant Metabolic: FixedValue=1
                Constant Storage: FixedValue=1
              NutrientPoolFunctions NDemandPriorityFactors: same as Sensibility.CanolaGrazing.CanolaGrazingBase.Zone.Canola.Grain.DMDemandPriorityFactors
              DivideFunction NumberFunction
                Memo
                  Grain number is simply estimated from grain mass and a constant potential grain size.
                VariableReference GrainMass: VariableName=[Grain].Wt
                VariableReference PotentialGrainSize: VariableName=[Grain].MaximumPotentialGrainSize
            GenericOrgan Stem: IsAboveGround=true
              Constant NReallocationFactor: FixedValue=1
              PhaseLookup NRetranslocationFactor
                PhaseLookupValue Vegetative: Start=Emergence; End=StartGrainFilling
                  Constant RetranslocationFactor: FixedValue=0
                PhaseLookupValue GrainFilling: Start=StartGrainFilling; End=EndGrainFill
                  Constant RetranslocationFactor: FixedValue=0.1
              PhaseLookup DMRetranslocationFactor
                PhaseLookupValue Vegetative: Start=Emergence; End=StartGrainFilling
                  Constant RetranslocationFactor: FixedValue=0
                PhaseLookupValue GrainFilling: Start=StartGrainFilling; End=EndGrainFill
                  Constant RetranslocationFactor: FixedValue=0.2
              LinearInterpolationFunction MaximumNConcX
                XYPairs: X=[3, 4, 5, 6]; Y=[4, 0.035, 0.025, 0.02]
                VariableReference XValue: VariableName=[Phenology].Stage
              VariableReference MaximumNConc: VariableName=[Leaf].MaximumNConc
              Constant MinimumNConc: FixedValue=0.005
              PhaseLookupValue NitrogenDemandSwitch: Start=Emergence; End=StartGrainFilling
                Constant: FixedValue=1
              BiomassRemoval BiomassRemovalDefaults
                OrganBiomassRemovalType Harvest: FractionLiveToRemove=0.5; FractionDeadToRemove=0; FractionLiveToResidue=0.1; FractionDeadToResidue=0
                OrganBiomassRemovalType Cut: FractionLiveToRemove=0.8; FractionDeadToRemove=0; FractionLiveToResidue=0; FractionDeadToResidue=0
                OrganBiomassRemovalType Prune: FractionLiveToRemove=0; FractionDeadToRemove=0; FractionLiveToResidue=0.6; FractionDeadToResidue=0
                OrganBiomassRemovalType Graze: FractionLiveToRemove=0.6; FractionDeadToRemove=0; FractionLiveToResidue=0.2; FractionDeadToResidue=0
              PhaseLookup SenescenceRate
                PhaseLookupValue PostCanopyPhase: Start=EndPodDevelopment; End=Maturity
                  MinimumFunction Rate
                    DivideFunction Fraction
                      VariableReference TT: VariableName=[Phenology].ThermalTime
                      SubtractFunction TTRemaining
                        ExpressionFunction PostCanopyTT
                          Expression=[Phenology].LateGrainFilling.Target+[Phenology].Maturing.Target
                        ExpressionFunction PostCanopyTTComplete
                          Expression=[Phenology].LateGrainFilling.ProgressThroughPhase+[Phenology].Maturing.ProgressThroughPhase
                    Constant One: FixedValue=1
              Constant DetachmentRateFunction: FixedValue=0; Units=/d
              Constant MaintenanceRespirationFunction: FixedValue=0; Units=0-1
              Constant DMConversionEfficiency: FixedValue=1; Units=0-1
              Constant DMReallocationFactor: FixedValue=1
              VariableReference CriticalNConc: VariableName=[Stem].MinimumNConc
              Constant RemobilisationCost: FixedValue=0
              Constant CarbonConcentration: FixedValue=0.4
              NutrientPoolFunctions DMDemandsOLD
                MultiplyFunction Structural
                  PartitionFractionDemandFunction DMDemandFunction
                    PhaseLookup PartitionFraction
                      PhaseLookupValue StemGrowthPhase: Start=Emergence; End=EndFlowering
                        LinearInterpolationFunction StemFraction
                          XYPairs: X=[0, 200, 201, 400]; Y=[0.5, 0.5, 0.62, 0.62]
                          VariableReference XValue: VariableName=[AboveGround].Wt
                      PhaseLookupValue GrainFilling: Start=EndFlowering; End=EndGrainFill
                        Constant StemFraction: FixedValue=0
                  Constant StructuralFraction: FixedValue=0.7
                Constant Metabolic: FixedValue=0
                StorageDMDemandFunction Storage
                  SubtractFunction StorageFraction
                    Constant One: FixedValue=1
                    VariableReference StructuralFraction: VariableName=[Stem].DMDemands.Structural.StructuralFraction
              NutrientDemandFunctions NDemands
                MultiplyFunction Structural
                  VariableReference MinNconc: VariableName=[Stem].minimumNconc
                  VariableReference PotentialDMAllocation: VariableName=[Stem].potentialDMAllocation.Structural
                MultiplyFunction Metabolic
                  SubtractFunction MetabolicNconc
                    VariableReference CritNconc: VariableName=[Stem].criticalNConc
                    VariableReference MinNconc: VariableName=[Stem].minimumNconc
                  VariableReference PotentialDMAllocation: VariableName=[Stem].potentialDMAllocation.Structural
                StorageNDemandFunction Storage
                  VariableReference NitrogenDemandSwitch: VariableName=[Stem].nitrogenDemandSwitch
                  VariableReference MaxNconc: VariableName=[Stem].maximumNconc
                Constant QStructuralPriority: FixedValue=1
                Constant QMetabolicPriority: FixedValue=1
                Constant QStoragePriority: FixedValue=1
              RetranslocateNonStructural RetranslocateNitrogen
              NutrientPoolFunctions InitialWt
                Constant Structural: FixedValue=0; Units=g/m^2
                Constant Metabolic: FixedValue=0
                Constant Storage: FixedValue=0
              Constant Photosynthesis: FixedValue=0
              VariableReference initialNConcFunction: VariableName=[Stem].MinimumNConc
              PartitionFractionDemandFunction PotentialGrowth
                PhaseLookup PartitionFraction
                  PhaseLookupValue EarlyVegetativeGrowthPhase: Start=Emergence; End=FloralInitiation
                    Constant StemFraction: FixedValue=0.1
                  PhaseLookupValue StemGrowthPhase: Start=FloralInitiation; End=EndFlowering
                    LinearInterpolationFunction StemFraction
                      XYPairs: X=[0, 200, 201, 400]; Y=[0.5, 0.5, 0.75, 0.75]
                      VariableReference XValue: VariableName=[AboveGround].Wt
                  PhaseLookupValue GrainFilling: Start=EndFlowering; End=EndGrainFill
                    Constant StemFraction: FixedValue=0
              NutrientDemandFunctions DMDemands
                MultiplyFunction Structural
                  PhaseLookup Fraction
                    PhaseLookupValue EarlyStemGrowthPhase: Start=Emergence; End=StartFlowering
                      Memo
                        This approach is based upon that used in [robertson_simulation_2002].
                      Constant Fraction: FixedValue=0.7
                    PhaseLookupValue LateStemGrowthPhase: Start=StartFlowering; End=EndFlowering
                      Memo
                        This approach is based upon that used in [robertson_simulation_2002].
                      Constant Fraction: FixedValue=0.8
                    PhaseLookupValue PodAndGrainGrowth: Start=EndFlowering; End=EndGrainFill
                      Constant Fraction: FixedValue=0
                  VariableReference DMDemand: VariableName=[Stem].PotentialGrowth
                Constant Metabolic: FixedValue=0
                MultiplyFunction Storage
                  VariableReference DMDemand: VariableName=[Stem].PotentialGrowth
                  SubtractFunction StorageFraction
                    Constant One: FixedValue=1
                    VariableReference StructuralFraction: VariableName=[Stem].DMDemands.Structural.Fraction
                Constant QStructuralPriority: FixedValue=1
                Constant QMetabolicPriority: FixedValue=1
                Constant QStoragePriority: FixedValue=1
            GenericOrgan Shell: IsAboveGround=true
              Constant NReallocationFactor: FixedValue=1
              Constant NRetranslocationFactor: FixedValue=0.5
              Constant MaximumNConc: FixedValue=0.045
              VariableReference CriticalNConc: VariableName=[Shell].MinimumNConc
              Constant MinimumNConc: FixedValue=0.01
              Constant DMRetranslocationFactor: FixedValue=0.1
              PhaseLookupValue NitrogenDemandSwitch: Start=StartPodDevelopment; End=EndPodDevelopment
                Constant: FixedValue=1
              BiomassRemoval BiomassRemovalDefaults: same as Sensibility.CanolaGrazing.CanolaGrazingBase.Zone.Canola.Leaf.BiomassRemovalDefaults
              PhaseLookup SenescenceRate
                PhaseLookupValue ReproductivePhase: Start=EndPodDevelopment; End=Maturity
                  MinimumFunction Rate
                    DivideFunction Fraction
                      VariableReference TT: VariableName=[Phenology].ThermalTime
                      SubtractFunction TTRemaining
                        ExpressionFunction ReproductiveTT
                          Expression=[Phenology].LateGrainFilling.Target + [Phenology].Maturing.Target
                        ExpressionFunction ReproductiveTT1Complete
                          Expression=[Phenology].LateGrainFilling.ProgressThroughPhase + [Phenology].Maturing.ProgressThroughPhase
                    Constant One: FixedValue=1
              Constant DetachmentRateFunction: FixedValue=0; Units=/d
              Constant MaintenanceRespirationFunction: FixedValue=0; Units=0-1
              Constant DMConversionEfficiency: FixedValue=1; Units=0-1
              Constant DMReallocationFactor: FixedValue=0
              Constant RemobilisationCost: FixedValue=0
              Constant CarbonConcentration: FixedValue=0.4
              AddFunction FillingDuration
                VariableReference EarlyPodDevelopmentDuration: VariableName=[Phenology].EarlyPodDevelopment.Target
                VariableReference EarlyGrainFillingDuration: VariableName=[Phenology].EarlyGrainFilling.Target
                VariableReference MidGrainFillingDuration: VariableName=[Phenology].MidGrainFilling.Target
              NutrientDemandFunctions DMDemands
                MultiplyFunction Structural
                  PhaseLookup DMDemandFunction
                    PhaseLookupValue PodDevelopment: Start=StartPodDevelopment; End=EndPodDevelopment
                      MultiplyFunction HIPodDemand
                        VariableReference AboveGroundWt: VariableName=[AboveGround].Wt
                        DivideFunction HarvestIndexIncrease
                          MaximumFunction OutstandingHarvestIndexIncrease
                            ExpressionFunction Increase: Expression=[Shell].PotentialHarvestIndex - [Shell].HarvestIndex
                            Constant Zero: FixedValue=0
                          SubtractFunction TTRemaining
                            ExpressionFunction ShellGrowthTT
                              Expression=[Phenology].EarlyPodDevelopment.Target+[Phenology].EarlyGrainFilling.Target+[Phenology].MidGrainFilling.Target
                            ExpressionFunction ShellGrowthTTComplete
                              Expression=[Phenology].EarlyPodDevelopment.ProgressThroughPhase+[Phenology].EarlyGrainFilling.ProgressThroughPhase+[Phenology].MidGrainFilling.ProgressThroughPhase
                        VariableReference ThermalTime: VariableName=[Phenology].ThermalTime
                  Constant StructuralFraction: FixedValue=1
                Constant Metabolic: FixedValue=0
                StorageDMDemandFunction Storage
                  SubtractFunction StorageFraction
                    Constant One: FixedValue=1
                    VariableReference StructuralFraction: VariableName=[Shell].DMDemands.Structural.StructuralFraction
                Constant QStructuralPriority: FixedValue=1
                Constant QMetabolicPriority: FixedValue=1
                Constant QStoragePriority: FixedValue=1
              NutrientDemandFunctions NDemands
                MultiplyFunction Structural
                  VariableReference MinNconc: VariableName=[Shell].minimumNconc
                  VariableReference PotentialDMAllocation: VariableName=[Shell].potentialDMAllocation.Structural
                StorageNDemandFunction Storage
                  VariableReference NitrogenDemandSwitch: VariableName=[Shell].nitrogenDemandSwitch
                  VariableReference MaxNconc: VariableName=[Shell].maximumNconc
                Constant Metabolic: FixedValue=0
                Constant QStructuralPriority: FixedValue=1
                Constant QMetabolicPriority: FixedValue=1
                Constant QStoragePriority: FixedValue=1
              RetranslocateNonStructural RetranslocateNitrogen
              NutrientPoolFunctions InitialWt: same as Sensibility.CanolaGrazing.CanolaGrazingBase.Zone.Canola.Stem.InitialWt
              MultiplyFunction PotentialHarvestIndex
                VariableReference PodHarvestIndex: VariableName=[Pod].PotentialHarvestIndex
                Constant ShellFraction: FixedValue=0.28; Units=0-1
              DivideFunction HarvestIndex
                VariableReference ShellWt: VariableName=[Shell].Wt
                VariableReference AboveGroundWt: VariableName=[AboveGround].Wt
              VariableReference initialNConcFunction: VariableName=[Shell].MinimumNConc
              ExpressionFunction Area: Expression=[Shell].Live.Wt*[Shell].SpecificArea
                VariableReference Index: VariableName=[Shell].Area
              Constant SpecificArea: FixedValue=0.01; Units=m^2/g
              EnergyBalance: Albedo=0.25; Gsmax350=0.015; R50=150; KDead=0; LAIDead=0
                MinimumFunction FRGRer
                  VariableReference RUE_FT: VariableName=[Shell].Photosynthesis.FT
                  MinimumFunction Others
                    VariableReference RUE_FN: VariableName=[Shell].Photosynthesis.FN
                    VariableReference RUE_FVPD: VariableName=[Shell].Photosynthesis.FVPD
                VariableReference Tallness: VariableName=[Leaf].Height
                VariableReference Deepness: VariableName=[Leaf].Height
                Constant DeadAreaIndex: FixedValue=1
                Constant GreenExtinctionCoefficient: FixedValue=0.8
                Constant Wideness: FixedValue=0
                Constant DeadExtinctionCoefficient: FixedValue=0
                StomatalConductanceCO2Modifier
                  VariableReference PhotosynthesisCO2Modifier: VariableName=[Shell].Photosynthesis.FCO2
                VariableReference GreenAreaIndex: VariableName=[Shell].Area.Index
              RUEModel Photosynthesis
                VariableReference RUE: VariableName=[Leaf].Photosynthesis.RUE
                VariableReference FT: VariableName=[Leaf].Photosynthesis.FT
                VariableReference FVPD: VariableName=[Leaf].Photosynthesis.FVPD
                LinearInterpolationFunction FN
                  XYPairs: X=[0, 1, 1.5]; Y=[1, 1, 1]
                  VariableReference XValue: VariableName=[Leaf].Fn
                LinearInterpolationFunction FW
                  XYPairs: X=[0, 1]; Y=[0, 1]
                  VariableReference XValue: VariableName=[Leaf].Fw
                VariableReference RadnInt: VariableName=[Shell].EnergyBalance.RadiationIntercepted
                VariableReference FCO2: VariableName=[Leaf].Photosynthesis.FCO2
            CompositeBiomass Pod: OrganNames=[Shell, Grain]; IncludeLive=true; IncludeDead=true
              DivideFunction HarvestIndex
                VariableReference PodWt: VariableName=[Pod].Wt
                VariableReference AboveGroundWt: VariableName=[AboveGround].Wt
              Constant PotentialHarvestIndex: FixedValue=0.6
                Memo
                  This approach is based upon that used in [robertson_simulation_2002].
            Constant MortalityRate: FixedValue=0
            CompositeBiomass AboveGround: OrganNames=[Leaf, Stem, Grain, Shell]; IncludeLive=true; IncludeDead=true
            CompositeBiomass AboveGroundLive: OrganNames=[Leaf, Stem, Grain, Shell]; IncludeLive=true; IncludeDead=false
            CompositeBiomass BelowGround: OrganNames=[Root]; IncludeLive=true; IncludeDead=true
            CompositeBiomass Total: OrganNames=[Leaf, Stem, Grain, Shell, Root]; IncludeLive=true; IncludeDead=true
            CompositeBiomass TotalLive: OrganNames=[Leaf, Stem, Grain, Shell, Root]; IncludeLive=true; IncludeDead=false
            CompositeBiomass TotalDead: OrganNames=[Leaf, Stem, Grain, Shell, Root]; IncludeLive=false; IncludeDead=true
            Folder CultivarFolder
              Cultivar 43C80_CL
                Command:
                  [Phenology].Vegetative.Target.XYPairs.X = 0,24
                  [Phenology].Vegetative.Target.XYPairs.Y = 400,200
                  [Leaf].Phyllochron.Base.FixedValue = 46
              Cultivar 44Y84_CL
                Command:
                  [Phenology].Vegetative.Target.XYPairs.X = 0,20
                  [Phenology].Vegetative.Target.XYPairs.Y = 300,200
                  [Leaf].Phyllochron.Base.FixedValue = 48
              Cultivar 44Y87_CL
                Command:
                  [Phenology].Vegetative.Target.XYPairs.X = 0,20
                  [Phenology].Vegetative.Target.XYPairs.Y = 450,250
                  [Leaf].Phyllochron.Base.FixedValue = 48
              Cultivar 44Y89_CL
                Command:
                  [Phenology].Vegetative.Target.XYPairs.X = 0,20
                  [Phenology].Vegetative.Target.XYPairs.Y = 380,280
                  [Leaf].Phyllochron.Base.FixedValue = 48
              Cultivar 44Y90_CL
                Command:
                  [Phenology].Vegetative.Target.XYPairs.X = 0,20
                  [Phenology].Vegetative.Target.XYPairs.Y = 300,250
                  [Leaf].Phyllochron.Base.FixedValue = 48
              Cultivar 45Y25_RR
                Command:
                  [Phenology].Vegetative.Target.XYPairs.X = 0,20
                  [Phenology].Vegetative.Target.XYPairs.Y = 300,200
                  [Leaf].Phyllochron.Base.FixedValue = 50
              Cultivar 45Y86_CL
                Command:
                  [Phenology].Vegetative.Target.XYPairs.X = 0,20
                  [Phenology].Vegetative.Target.XYPairs.Y = 300,200
                  [Leaf].Phyllochron.Base.FixedValue = 50
              Cultivar 45Y88_CL
                Command:
                  [Phenology].Vegetative.Target.XYPairs.X = 0,20
                  [Phenology].Vegetative.Target.XYPairs.Y = 380,250
                  [Leaf].Phyllochron.Base.FixedValue = 50
              Cultivar 45Y91_CL
                Command:
                  [Phenology].Vegetative.Target.XYPairs.X = 0,25
                  [Phenology].Vegetative.Target.XYPairs.Y = 350,250
                  [Leaf].Phyllochron.Base.FixedValue = 39
              Cultivar 46Y78
                Command:
                  [Phenology].Vegetative.Target.XYPairs.X = 0,16
                  [Phenology].Vegetative.Target.XYPairs.Y = 600,177.78
                  [Leaf].Phyllochron.Base.FixedValue = 55
                  [Leaf].Photosynthesis.RUE.TriazineToleranceModifier.FixedValue = 1.1
              Cultivar Arazzo
                Command:
                  [Phenology].Vegetative.Target.XYPairs.X = 0,30
                  [Phenology].Vegetative.Target.XYPairs.Y = 2200,250
                  [Leaf].Phyllochron.Base.FixedValue = 55
              Cultivar Archer
                Command:
                  [Phenology].Vegetative.Target.XYPairs.X = 0, 20
                  [Phenology].Vegetative.Target.XYPairs.Y = 500,250
                  [Phenology].StemElongation.Target.PPResponse.Amount.FixedValue = 150
                  // First leaf 2 Phyllochrons
                  // last leaves at 0.55 Phyllochron
                  [Leaf].Phyllochron.Base.FixedValue = 50
              Cultivar ATR_Bonito
                Command:
                  [Phenology].Vegetative.Target.XYPairs.X = 0,25
                  [Phenology].Vegetative.Target.XYPairs.Y = 320,200
                  [Leaf].Phyllochron.Base.FixedValue = 55
                  [Leaf].Photosynthesis.RUE.TriazineToleranceModifier.FixedValue = 0.78
              Cultivar ATR_Gem
                Command:
                  [Phenology].Vegetative.Target.XYPairs.X = 0,16
                  [Phenology].Vegetative.Target.XYPairs.Y = 470,250
                  [Leaf].Photosynthesis.RUE.TriazineToleranceModifier.FixedValue = 0.78
                  [Leaf].Phyllochron.Base.FixedValue = 61
              Cultivar ATR_Marlin
                Command:
                  [Phenology].Vegetative.Target.XYPairs.X = 0,16
                  [Phenology].Vegetative.Target.XYPairs.Y = 550,250
                  [Leaf].Phyllochron.Base.FixedValue = 55
                  [Leaf].Photosynthesis.RUE.TriazineToleranceModifier.FixedValue = 0.78
              Cultivar ATR_Stingray
                Command:
                  [Phenology].Vegetative.Target.XYPairs.X = 0,6
                  [Phenology].Vegetative.Target.XYPairs.Y = 500,250
                  [Phenology].StemElongation.Target.PPResponse.Amount.FixedValue = 200
                  [Leaf].Photosynthesis.RUE.TriazineToleranceModifier.FixedValue = 0.78
                  [Leaf].Phyllochron.Base.FixedValue = 54
              Cultivar ATR_Wahoo
                Command:
                  [Phenology].Vegetative.Target.XYPairs.X = 0,13
                  [Phenology].Vegetative.Target.XYPairs.Y = 500,200
                  [Leaf].Phyllochron.Base.FixedValue = 57
                  [Leaf].Photosynthesis.RUE.TriazineToleranceModifier.FixedValue = 0.78
              Cultivar Crusher_TT
                Command:
                  [Phenology].Vegetative.Target.XYPairs.X = 0,20
                  [Phenology].Vegetative.Target.XYPairs.Y = 300,200
                  [Leaf].Photosynthesis.RUE.TriazineToleranceModifier.FixedValue = 0.78
                  [Leaf].Phyllochron.Base.FixedValue = 50
              Cultivar AV_Garnet
                Command:
                  [Phenology].Vegetative.Target.XYPairs.X = 0,16
                  [Phenology].Vegetative.Target.XYPairs.Y = 550,250
                  [Leaf].Phyllochron.Base.FixedValue = 55
              Cultivar AV_Zircon
                Command:
                  [Phenology].Vegetative.Target.XYPairs.X = 0,25
                  [Phenology].Vegetative.Target.XYPairs.Y = 450,200
                  [Leaf].Phyllochron.Base.FixedValue = 55
              Cultivar CB_Taurus
                Command:
                  [Phenology].Vegetative.Target.XYPairs.X = 17,18,30
                  [Phenology].Vegetative.Target.XYPairs.Y = 2500,850,250
                  [Leaf].Phyllochron.Base.FixedValue = 50
              Cultivar CB_Telfer
                Command:
                  [Phenology].Vegetative.Target.XYPairs.X = 0,20
                  [Phenology].Vegetative.Target.XYPairs.Y = 350,350
                  [Phenology].StemElongation.Target.PPResponse.Amount.FixedValue = 50
                  [Leaf].Photosynthesis.RUE.TriazineToleranceModifier.FixedValue = 0.78
                  [Leaf].Phyllochron.Base.FixedValue = 65
                  [Leaf].Plastochron.Multiplier.FixedValue=0.9
              Cultivar CBI_306
                Command:
                  [Phenology].Vegetative.Target.XYPairs.X = 0,20
                  [Phenology].Vegetative.Target.XYPairs.Y = 300,200
                  [Leaf].Phyllochron.Base.FixedValue = 50
              Cultivar CSCH_01
                Command:
                  [Phenology].Vegetative.Target.XYPairs.X = 0,20
                  [Phenology].Vegetative.Target.XYPairs.Y = 310,250
                  [Leaf].Phyllochron.Base.FixedValue = 50
              Cultivar CSCH_02
                Command:
                  [Phenology].Vegetative.Target.XYPairs.X = 0,20
                  [Phenology].Vegetative.Target.XYPairs.Y = 400,250
                  [Leaf].Phyllochron.Base.FixedValue = 50
              Cultivar Drum_triazine
                Command:
                  [Phenology].Vegetative.Target.XYPairs.X = 0,20
                  [Phenology].Vegetative.Target.XYPairs.Y = 300,200
                  [Leaf].Photosynthesis.RUE.TriazineToleranceModifier.FixedValue = 0.78
                  [Leaf].Phyllochron.Base.FixedValue = 50
              Cultivar Dunkeld
                Command:
                  [Phenology].Vegetative.Target.XYPairs.X = 0,20
                  [Phenology].Vegetative.Target.XYPairs.Y = 300,200
                  [Leaf].Phyllochron.Base.FixedValue = 50
              Cultivar Grouse
                Command:
                  [Phenology].Vegetative.Target.XYPairs.X = 0,20
                  [Phenology].Vegetative.Target.XYPairs.Y = 300,200
                  [Leaf].Phyllochron.Base.FixedValue = 50
              Cultivar GT50_RR
                Command:
                  [Phenology].Vegetative.Target.XYPairs.X = 0,20
                  [Phenology].Vegetative.Target.XYPairs.Y = 300,200
                  [Leaf].Phyllochron.Base.FixedValue = 50
              Cultivar Hyola42
                Command:
                  [Phenology].Vegetative.Target.XYPairs.X = 0,20
                  [Phenology].Vegetative.Target.XYPairs.Y = 300,200
                  [Leaf].Phyllochron.Base.FixedValue = 50
              Cultivar Hyola450_TT
                Command:
                  [Phenology].Vegetative.Target.XYPairs.X = 0,20
                  [Phenology].Vegetative.Target.XYPairs.Y = 350,150
                  [Phenology].StemElongation.Target.PPResponse.Amount.FixedValue = 200
                  [Leaf].Photosynthesis.RUE.TriazineToleranceModifier.FixedValue = 0.78
                  [Leaf].Phyllochron.Base.FixedValue = 54
                  /*
                                  built from Stingray
                              */
              Cultivar Hyola559_TT
                Command:
                  [Phenology].Vegetative.Target.XYPairs.X = 0,16
                  [Phenology].Vegetative.Target.XYPairs.Y = 500,270
                  [Leaf].Photosynthesis.RUE.TriazineToleranceModifier.FixedValue = 0.78
                  [Leaf].Phyllochron.Base.FixedValue = 51
              Cultivar Hyola575_CL
                Command:
                  [Phenology].Vegetative.Target.XYPairs.X = 0,16
                  [Phenology].Vegetative.Target.XYPairs.Y = 370,270
                  [Leaf].Phyllochron.Base.FixedValue = 49
                Alias Hyola_575_CL_GT
              Cultivar Hyola577_CL
                Command:
                  [Phenology].Vegetative.Target.XYPairs.X = 0,16
                  [Phenology].Vegetative.Target.XYPairs.Y = 360,213.33
                  [Leaf].Phyllochron.Base.FixedValue = 49
              Cultivar Hyola600_RR
                Command:
                  [Phenology].Vegetative.Target.XYPairs.X = 0,5,8,20
                  [Phenology].Vegetative.Target.XYPairs.Y = 500,400,200,150
                  [Phenology].StemElongation.Target.PPResponse.Amount.FixedValue = 200
                  [Leaf].Phyllochron.Base.FixedValue = 51
              Cultivar Hyola635_CL
                Command:
                  [Phenology].Vegetative.Target.XYPairs.X = 0,20
                  [Phenology].Vegetative.Target.XYPairs.Y = 550,280
                  [Leaf].Phyllochron.Base.FixedValue = 51
              Cultivar Hyola650_TT
                Command:
                  [Phenology].Vegetative.Target.XYPairs.X = 0,20
                  [Phenology].Vegetative.Target.XYPairs.Y = 550,250
                  [Leaf].Photosynthesis.RUE.TriazineToleranceModifier.FixedValue = 0.78
                  [Leaf].Phyllochron.Base.FixedValue = 48
              Cultivar Hyola725_RT
                Command:
                  [Phenology].Vegetative.Target.XYPairs.X = 0,20
                  [Phenology].Vegetative.Target.XYPairs.Y = 550,250
                  [Leaf].Photosynthesis.RUE.TriazineToleranceModifier.FixedValue = 0.78
                  [Leaf].Phyllochron.Base.FixedValue = 48
              Cultivar Hyola750_TT
                Command:
                  [Phenology].Vegetative.Target.XYPairs.X = 0,20
                  [Phenology].Vegetative.Target.XYPairs.Y = 550,300
                  [Leaf].Photosynthesis.RUE.TriazineToleranceModifier.FixedValue = 0.78
                  [Leaf].Phyllochron.Base.FixedValue = 50
              Cultivar Hyola970_CL
                Command:
                  [Phenology].Vegetative.Target.XYPairs.X = 0,30
                  [Phenology].Vegetative.Target.XYPairs.Y = 2200,250
                  [Leaf].Phyllochron.Base.FixedValue = 54
              Cultivar Hyola971_CL
                Command:
                  [Phenology].Vegetative.Target.XYPairs.X = 0,30
                  [Phenology].Vegetative.Target.XYPairs.Y = 2200,250
                  [Leaf].Phyllochron.Base.FixedValue = 54
              Cultivar IH30_RR
                Command:
                  [Phenology].Vegetative.Target.XYPairs.X = 0,16
                  [Phenology].Vegetative.Target.XYPairs.Y = 342.22,220
                  [Leaf].Phyllochron.Base.FixedValue = 51
              Cultivar IVT4510
                Command:
                  [Phenology].Vegetative.Target.XYPairs.X = 0,20
                  [Phenology].Vegetative.Target.XYPairs.Y = 300,200
                  [Leaf].Phyllochron.Base.FixedValue = 48
              Cultivar K50055
                Command:
                  [Phenology].Vegetative.Target.XYPairs.X = 0,25
                  [Phenology].Vegetative.Target.XYPairs.Y = 500,400
                  [Leaf].Phyllochron.Base.FixedValue = 56
              Cultivar K50058
                Command:
                  [Phenology].Vegetative.Target.XYPairs.X = 0,25
                  [Phenology].Vegetative.Target.XYPairs.Y = 500,450
                  [Leaf].Phyllochron.Base.FixedValue = 66
              Cultivar Karoo_triazine
                Command:
                  [Phenology].Vegetative.Target.XYPairs.X = 0,20
                  [Phenology].Vegetative.Target.XYPairs.Y = 300,200
                  [Leaf].Photosynthesis.RUE.TriazineToleranceModifier.FixedValue = 0.78
                  [Leaf].Phyllochron.Base.FixedValue = 50
              Cultivar Monty
                Command:
                  [Phenology].Vegetative.Target.XYPairs.X = 0,20
                  [Phenology].Vegetative.Target.XYPairs.Y = 305,205
                  [Leaf].Phyllochron.Base.FixedValue = 50
              Cultivar NS_Diamond
                Command:
                  [Phenology].Vegetative.Target.XYPairs.X = 0, 25
                  [Phenology].Vegetative.Target.XYPairs.Y = 370,270
                  [Leaf].Phyllochron.Base.FixedValue = 51
              Cultivar NX953
                Command:
                  [Phenology].Vegetative.Target.XYPairs.X = 0,20
                  [Phenology].Vegetative.Target.XYPairs.Y = 160,160
                  [Leaf].Phyllochron.Base.FixedValue = 50
              Cultivar Oscar
                Command:
                  [Phenology].Vegetative.Target.XYPairs.X = 0,20
                  [Phenology].Vegetative.Target.XYPairs.Y = 470,270
                  [Leaf].Phyllochron.Base.FixedValue = 53
              Cultivar Pinnacle_triazine
                Command:
                  [Phenology].Vegetative.Target.XYPairs.X = 0,20
                  [Phenology].Vegetative.Target.XYPairs.Y = 300,200
                  [Leaf].Photosynthesis.RUE.TriazineToleranceModifier.FixedValue = 0.78
                  [Leaf].Phyllochron.Base.FixedValue = 55
                Alias Pinnacle
              Cultivar Range
                Command:
                  [Phenology].Vegetative.Target.XYPairs.X = 0,20
                  [Phenology].Vegetative.Target.XYPairs.Y = 300,200
                  [Leaf].Phyllochron.Base.FixedValue = 50
              Cultivar Sensation
                Command:
                  [Phenology].Vegetative.Target.XYPairs.X = 0,30
                  [Phenology].Vegetative.Target.XYPairs.Y = 2200,250
                  [Leaf].Phyllochron.Base.FixedValue = 54
              Cultivar SF_Brazzil
                Command:
                  [Phenology].Vegetative.Target.XYPairs.X = 0,30
                  [Phenology].Vegetative.Target.XYPairs.Y = 2200,250
                  [Leaf].Phyllochron.Base.FixedValue = 50
              Cultivar SF_Edimax
                Command:
                  [Phenology].Vegetative.Target.XYPairs.X = 0,30
                  [Phenology].Vegetative.Target.XYPairs.Y = 2200,250
                  [Leaf].Phyllochron.Base.FixedValue = 45
              Cultivar Victory_7001_CL
                Command:
                  [Phenology].Vegetative.Target.XYPairs.X = 0,25
                  [Phenology].Vegetative.Target.XYPairs.Y = 430,200
                  [Leaf].Phyllochron.Base.FixedValue = 56
            Constant SeedMortalityRate: FixedValue=0
          Manager SowingRule
            SowDate = 15-Mar
            CultivarName = Hyola971_CL
            SowingDepth = 25
            RowSpacing = 180
            Population = 45
            script: same as in Sensibility.DetailedDynamics.DetailedDynamicsBase.Paddock.SowingRule
          Manager Fertilise at sowing
            Crop = [Canola]
            FertiliserType = NH4N
            Amount = 31
            script: same as in Sensibility.DetailedDynamics.DetailedDynamicsBase.Paddock.Fertilise at sowing
          Manager HarvestAfterDate
            HarvestDate = 11-Nov-2008
```csharp
using Models.Soils;
using System;
using Models.Core;
using System.Text;
using Models.PMF;
using Models;
using APSIM.Shared.Utilities;
using Models.PMF.Phen;

namespace Models
{
    [Serializable] 
    public class Script : Model
    {
        [Link] ISummary summary;
        [Link] private Plant canola;
        [Link(Type = LinkType.Path, Path = "[canola].Phenology")]
        private Phenology phenology;
                [Link] Clock Clock;

        private bool Harvestable = false;

        [Description("Harvest Date (d-mmm-yyyy)")]
        public string HarvestDate { get; set; }   
      
        [EventSubscribe("DoManagement")]
        private void OnDoManagement(object sender, EventArgs e)
        {
           
            if (Harvestable && phenology.CurrentPhase.Name == "ReadyForHarvesting")
            {
                canola.Harvest();
                canola.EndCrop();                
            }
            
            if (DateUtilities.DatesAreEqual(HarvestDate, Clock.Today))
                Harvestable = true;

        }
    }
}
```
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