Simulations: Version=76
  Memo TitlePage
    The APSIM Gliricidia Model

    Huth, N.I. and Smethurst, P.J.
  Memo Introduction
    The APSIM gliricidia model  . . . . .
  Replacements
    Memo
      This is a test
    Manager CuttingManagement
      LeafRemovalWt = 0
      StemRemovalWt = 0
      TotalRemovalWt = 0
```csharp
using System;
using System.Collections.Generic;
using Models.Core;
using Models.PMF;
using Models.PMF.Interfaces;
using System.Xml.Serialization;

namespace Models
{
    [Serializable] 
    [System.Xml.Serialization.XmlInclude(typeof(Model))]
    public class Script : Model
    {
        [Link(ByName = true)] Plant Gliricidia;
        [Link] Clock Clock;

    
        [XmlIgnore] private RemovalFractions Remove { get; set; }

        [Description("Leaf Removal Wt")]
        public double LeafRemovalWt {get; set;}


        [Description("Stem Removal Wt")]
        public double StemRemovalWt {get; set;}

        [Description("Total Removal Wt")]
        public double TotalRemovalWt {get; set;}

        [EventSubscribe("Commencing")]
        private void OnSimulationCommencing(object sender, EventArgs e)
        {
            Remove = new RemovalFractions();
        }

        [EventSubscribe("StartOfDay")]
        private void OnStartOfDay(object sender, EventArgs e)
        {

        LeafRemovalWt = 0;
        StemRemovalWt = 0;
        TotalRemovalWt = 0;
        }

        public void DoCut(double LeafResidue, double StemResidue)
        {
            double L = (double)Apsim.Get(Gliricidia, "Leaf.Live.Wt");
            double LeafRemovalFraction = 0;

            if (L > 0)
                LeafRemovalFraction = (L - LeafResidue) / L;
                LeafRemovalWt = (L - LeafResidue);
            if (LeafRemovalFraction < 0)
                LeafRemovalFraction = 0;
               
            double S = (double)Apsim.Get(Gliricidia, "Stem.Live.Wt");
            double StemRemovalFraction = 0;

            if (S > 0)
                StemRemovalFraction = (S - StemResidue) / S; 
                StemRemovalWt = (S - StemResidue);              
            if (StemRemovalFraction < 0)
                StemRemovalFraction = 0;

            TotalRemovalWt = LeafRemovalWt + StemRemovalWt;
               
            Remove.SetFractionToRemove("Leaf", LeafRemovalFraction);
            Remove.SetFractionToRemove("Stem", StemRemovalFraction);
            Remove.SetFractionToResidue("Leaf", 0.0);
            Remove.SetFractionToResidue("Stem", 0.0);
            Gliricidia.RemoveBiomass("Cut", Remove);
        }
        
    }
}
```
    Report GliricidiaDailyReport: EventNames=[Clock].DoReport
      VariableNames:
        [Clock].Today
        [Zone].Area
        [Soil].SoilWater.Es
        sum([Soil].SoilNitrogen.NO3.kgha) as TotalNO3N
        sum([Soil].SoilNitrogen.NH4.kgha) as TotalNH4N
        sum([Soil].SoilWater.SWmm) as SWTotal
        [Soil].SoilWater.SW[2] as SW30cm
        [Soil].SoilWater.SW[3] as SW50cm
        [Soil].SoilWater.SW[4] as SW70cm
        [Soil].FInert[1] as FInert10cm
        [Soil].SoilNitrogen.OC[1] as SOC10cm
        [Soil].SoilNitrogen.OC[2] as SOC30cm
        [Soil].SoilNitrogen.OC[3] as SOC50cm
        [Soil].SoilNitrogen.OC[4] as SOC70cm
        [Soil].SoilNitrogen.NO3.kghappm[1] as NO3ppm10cm
        [Soil].SoilNitrogen.NO3.kghappm[2] as NO3ppm30cm
        [Soil].SoilNitrogen.NO3.kghappm[3] as NO3ppm50cm
        [Soil].SoilNitrogen.NO3.kgha[1] as NO3kgpha10cm
        [Soil].SoilNitrogen.NO3.kgha[2] as NO3kgpha30cm
        [Soil].SoilNitrogen.NO3.kgha[3] as NO3kgpha50cm
        [Soil].SoilNitrogen.dlt_n_min_res[1] as NNM10cm
        [MicroClimate].peta
        [MicroClimate].petr
        [Soil].SoilWater.Eo
        [Soil].FBiom[1] as FBiom10cm
        [Soil].SoilWater.SW[1] as SurfaceSW
        [SurfaceOrganicMatter].Wt
        sum([Soil].SoilNitrogen.FOMN) as FOMN
        sum([Soil].SoilNitrogen.HumicN) as HumicN
        sum([Soil].SoilNitrogen.MicrobialN) as MicrobialN
        [Soil].SoilNitrogen.MicrobialN[1] as MicrobialN1
        [Soil].SoilNitrogen.MicrobialN[2] as MicrobialN2
        [Soil].SoilNitrogen.MicrobialN[3] as MicrobialN3
        [Gliricidia].Leaf.LAI
        [Gliricidia].Leaf.Fn
        [Gliricidia].Leaf.Live.NConc
        [Gliricidia].Leaf.MaximumNConc.FixedValue
        [Gliricidia].Leaf.MinimumNConc.FixedValue
        [Gliricidia].Leaf.Fw
        [Gliricidia].Leaf.Live.Wt
        [Gliricidia].Leaf.Live.Wt
        [Gliricidia].Stem.Live.Wt
        [Gliricidia].Root.Live.Wt
        [Gliricidia].Root.TotalDMDemand
        [Gliricidia].Stem.DMDemands.Structural.DMDemandFunction.Value
        [Gliricidia].Leaf.DMDemands.Structural.DMDemandFunction.Value
        [Gliricidia].Root.PartitionFraction.Value
        [Gliricidia].AboveGround.Wt
        [Gliricidia].Leaf.CoverTotal
        [Gliricidia].Leaf.Live.Wt
        [Gliricidia].Leaf.Dead.Wt
        [Gliricidia].Leaf.Detached.Wt
        [Gliricidia].Stem.Live.Wt
        [Gliricidia].Stem.Dead.Wt
        [Gliricidia].Stem.Detached.Wt
        [Gliricidia].Stem.Dead.Wt
        [Gliricidia].CoarseRoot.Live.Wt
        [Gliricidia].Nodule.FixationRate
        [Gliricidia].Nodule.NFixed
        [Gliricidia].Stem.Live.StorageWt
        [Gliricidia].Stem.Live.StructuralWt
        [Gliricidia].Stem.Live.StorageN
        [Gliricidia].Stem.Live.StructuralN
        [Gliricidia].Leaf.Photosynthesis
        [Gliricidia].Leaf.DMDemands.Structural.DMDemandFunction
        [Gliricidia].Stem.DMDemands.Structural.DMDemandFunction
        [Gliricidia].Root.DMDemands.Structural.DMDemandFunction
        [Gliricidia].Stem.DemandedDMStructural
        [Gliricidia].Stem.DemandedDMNonStructural
        [Gliricidia].Leaf.Detached.Wt
        [CuttingManagement].Script.StemRemovalWt
        [CuttingManagement].Script.LeafRemovalWt
        [CuttingManagement].Script.TotalRemovalWt
    Report GlircidiaAnnualOutput: EventNames=[Clock].EndOfYear
      VariableNames:
        [Clock].Today
        [Clock].Today.Year
        [Gliricidia].Age
        [Gliricidia].LAI
        sum of [CuttingManagement].Script.TotalRemovalWt from 1-Jan to 31-Dec as AnnualTotalRemovalWt
        sum of [Gliricidia].Nodule.NFixed from 1-Jan to 31-Dec as NFixedAnnualgpm2
    Report MaizeDailyReport: EventNames=[Clock].DoReport
      VariableNames:
        [Clock].Today
        [Clock].Today.DayOfYear
        [Zone].Area
        [Soil].SoilWater.Es
        ([Soil].SoilNitrogen.NO3.kgha[1]+[Soil].SoilNitrogen.NH4.kgha[1]) as SurfaceMineralN
        ([Soil].SoilNitrogen.NO3.kgha[2]+[Soil].SoilNitrogen.NH4.kgha[2]) as Soil2MineralN
        ([Soil].SoilNitrogen.NO3.kgha[3]+[Soil].SoilNitrogen.NH4.kgha[3]) as Soil3MineralN
        ([Soil].SoilNitrogen.NO3.kgha[4]+[Soil].SoilNitrogen.NH4.kgha[4]) as Soil4MineralN
        ([Soil].SoilNitrogen.NO3.kgha[3]+[Soil].SoilNitrogen.NH4.kgha[3]+[Soil].SoilNitrogen.NO3.kgha[4]+[Soil].SoilNitrogen.NH4.kgha[4]) as SubsurfaceMineralN
        sum([Soil].SoilNitrogen.NO3.kgha) as TotalNO3N
        sum([Soil].SoilNitrogen.NH4.kgha) as TotalNH4N
        sum([Soil].SoilWater.SWmm[1:10]) as SW200cm
        [Soil].SoilWater.SW[2] as SW30cm
        [Soil].SoilWater.SW[3] as SW50cm
        [Soil].SoilWater.SW[4] as SW70cm
        [Soil].FInert[1] as FInert10cm
        [Soil].SoilNitrogen.OC[1] as SOC10cm
        [Soil].SoilNitrogen.OC[2] as SOC30cm
        [Soil].SoilNitrogen.OC[3] as SOC50cm
        [Soil].SoilNitrogen.OC[4] as SOC70cm
        [Soil].SoilNitrogen.NO3.kghappm[1] as NO3ppm10cm
        [Soil].SoilNitrogen.NO3.kghappm[2] as NO3ppm30cm
        [Soil].SoilNitrogen.NO3.kghappm[3] as NO3ppm50cm
        [Soil].SoilNitrogen.NO3.kgha[1] as NO3kgpha10cm
        [Soil].SoilNitrogen.NO3.kgha[2] as NO3kgpha30cm
        [Soil].SoilNitrogen.NO3.kgha[3] as NO3kgpha50cm
        [Soil].SoilNitrogen.dlt_n_min_res[1] as NNM10cm
        [Soil].SoilWater.LeachNO3
        [Soil].SoilWater.FlowNO3
        [MicroClimate].peta
        [SurfaceOrganicMatter].Wt
        sum([Soil].SoilNitrogen.FOMN) as FOMN
        sum([Soil].SoilNitrogen.HumicN) as HumicN
        sum([Soil].SoilNitrogen.MicrobialN) as MicrobialN
        [Soil].SoilNitrogen.MicrobialN[1] as MicrobialN1
        [Soil].SoilNitrogen.MicrobialN[2] as MicrobialN2
        [Soil].SoilNitrogen.MicrobialN[3] as MicrobialN3
        [MicroClimate].petr
        [Soil].SoilWater.Eo
        [Soil].FBiom[1] as FBiom10cm
        [Soil].SoilWater.SW[1] as SurfaceSW
        [Maize].Leaf.Fw
        [Maize].Leaf.Photosynthesis.FVPD.Value
        [Maize].Leaf.Photosynthesis.FT.Value
        [Maize].Leaf.Fn
        [Maize].Root.Depth
        [Maize].Grain.Live.Wt as GrainWt
        [Maize].Phenology.DaysAfterSowing
        [Maize].Phenology.Photoperiod.Value
        [Maize].Phenology.Photosensitive.Target.Value
        [Maize].Phenology.LeafAppearance.FractionComplete
        [Maize].Structure.FinalLeafNumber.Value
        [Maize].Phenology.FloweringDAS.Value as FloweringDAS
        [Maize].Leaf.ExpandedCohortNo
    Report MaizeHarvestReport: EventNames=[Maize].Harvesting
      VariableNames:
        [Clock].Today
        [Clock].Today.Year as Year
        [Zone].Area
        [Maize].SowingData.Population
        [Maize].SowingDate.DayOfYear
        [Maize].Phenology.CurrentStageName as Stage
        [Maize].Grain.Wt
        [Maize].Stem.Live.Wt
        [Maize].EarLive.Wt
        [Maize].Leaf.Live.Wt
        [Maize].Root.Live.Wt
        [Maize].Husk.Live.Wt
        [Maize].Rachis.Live.Wt
        [Maize].EarLive.N
        [Maize].Grain.Live.N
        [Maize].Stem.Live.N
        [Maize].Leaf.Live.N
        [Maize].Root.Live.N
        [Maize].Root.Depth
        [Maize].AboveGround.N
        [Maize].AboveGround.Wt
        [Maize].Total.N
        [Maize].Total.Wt
        'max of [Maize].Leaf.LAI from [Maize].Sowing to [Maize].Harvesting as LAImax
        [Maize].Grain.Number
        [Maize].Grain.Size
        [Maize].Population
        [Maize].Phenology.FloweringDAS.Value as FloweringDAS
        sum([Soil].SoilNitrogen.FOMC) as FOMC
        sum([Soil].SoilNitrogen.HumicC) as HumicC
        sum([Soil].SoilNitrogen.MicrobialC) as MicrobialC
    Plant Gliricidia: CropType=Gliricidia; IsEnding=false; DaysAfterEnding=0
      AccumulateFunction Age: StartStageName=Emergence; EndStageName=Old; FractionRemovedOnCut=0; FractionRemovedOnHarvest=0; FractionRemovedOnGraze=0; FractionRemovedOnPrune=0
        Constant day: FixedValue=0.00273973
        Memo
          This is a test
      Phenology
        StageBasedInterpolation StageCode: Stages=[Emergence, EndJuvenile, Maturity, Old]; Codes=[1, 2, 3, 4]; Proportional=true
        Constant ThermalTime: FixedValue=1
        GerminatingPhase Germinating: Start=Sowing; End=Germination
        EmergingPhase Emerging: ShootLag=1; ShootRate=0; Start=Germination; End=Emergence; TTForTimeStep=0
          VariableReference ThermalTime: VariableName=[Phenology].ThermalTime
        GenericPhase Juvenile: Start=Emergence; End=EndJuvenile
          Constant Progression: FixedValue=1
          Constant Target: FixedValue=365
        GenericPhase Mature: Start=EndJuvenile; End=Maturity
          Constant Progression: FixedValue=1
          Constant Target: FixedValue=1825
        GenericPhase Declining: Start=Maturity; End=Old
          Constant Progression: FixedValue=1
          Constant Target: FixedValue=27010
        EndPhase Old: Start=Old; End=Unused
          Constant ThermalTime: FixedValue=1
      OrganArbitrator Arbitrator
        RelativeAllocation NArbitrator
        RelativeAllocation DMArbitrator
      CompositeBiomass AboveGround: Propertys=[[Leaf].Live, [Leaf].Dead, [Stem].Live, [Stem].Dead]; DMDOfStructural=0.6
      CompositeBiomass BelowGround: Propertys=[[Root].Live, [Root].Dead]; DMDOfStructural=0.6
      CompositeBiomass Total: DMDOfStructural=0.6
        Propertys=[[Leaf].Live, [Leaf].Dead, [Stem].Live, [Stem].Dead, [Root].Live, [Root].Dead]
      CompositeBiomass TotalLive: Propertys=[[Leaf].Live, [Stem].Live, [Root].Live]; DMDOfStructural=0.6
      DivideFunction IndividualTreeLiveWt
        VariableReference LiveWt: VariableName=[Gliricidia].TotalLive.Wt
        VariableReference Population: VariableName=[Gliricidia].Population
      CompositeBiomass TotalDead: Propertys=[[Leaf].Dead, [Stem].Dead, [Root].Dead]; DMDOfStructural=0.6
      PerennialLeaf Leaf: MaintenanceRespiration=0; GrowthRespiration=0; Albedo=0.18; Gsmax350=0.015; R50=150; LAI=0; Height=0; FRGR=0; PotentialEP=0; WaterDemand=0
        MultiplyFunction InitialWtFunction
          Constant InitialPlantWt: FixedValue=1; Units=g/plant
            Memo
              This is a test
          VariableReference Population: VariableName=[Plant].Population
        Constant LaiDeadFunction: FixedValue=0; Units=m^2/m^2
        MultiplyFunction Photosynthesis
          Constant RUE: FixedValue=1.2
            Memo
              Value of 1.06 g/MJ for above ground growth from
              Radiation Interception and Growth of Planted and Coppice Stands of Four Fast-GrowingTropical Trees
              Author(s): Robin A. Harrington and James H. Fownes
              Source: Journal of Applied Ecology, Vol. 32, No. 1 (Feb., 1995), pp. 1-8
          VariableReference InterceptedRadiation: VariableName=[Leaf].RadIntTot
          LinearInterpolationFunction WaterStressFactor
            XYPairs: X=[0, 1]; Y=[0, 1]
            VariableReference XValue: VariableName=[Leaf].Fw
          VariableReference Frgr: VariableName=[Leaf].FRGRFunction
        MinimumFunction FRGRFunction
          AirTemperatureFunction FRGRFunctionTemp
            XYPairs: X=[0, 10, 32, 42]; Y=[0, 1, 1, 0]
          LinearInterpolationFunction NitrogenStressFactor
            XYPairs: X=[0, 1]; Y=[0, 1]
            VariableReference XValue: VariableName=[Leaf].Fn
        Constant ExtinctionCoefficient: FixedValue=0.57
          Memo
            Value of 0.57 from
            Radiation Interception and Growth of Planted and Coppice Stands of Four Fast-GrowingTropical Trees
            Author(s): Robin A. Harrington and James H. Fownes
            Source: Journal of Applied Ecology, Vol. 32, No. 1 (Feb., 1995), pp. 1-8

            But their data suggests a value of 0.3
        Constant ExtinctionCoefficientDead: same as Replacements.Gliricidia.Leaf.ExtinctionCoefficient
        LinearInterpolationFunction HeightFunction
          XYPairs: X=[3, 5, 6]; Y=[100, 800, 1200]
          VariableReference XValue: VariableName=[Phenology].Stage
        Constant MaximumNConc: FixedValue=0.07
          Memo
            0.043 gN/g from R.B. Thomas 1, D.D. Richter 2, H. Ye 2, P.R. Heine z, and B.R. Strain 1 Nitrogen dynamics and growth of seedlings of an N-fixing tree
            (GKricidia sepium (Jacq.) Walp.) exposed to elevated atmospheric carbon dioxide Oecologia (1991) 88:415-421
        Constant MinimumNConc: FixedValue=0.03
        Constant NReallocationFactor: FixedValue=0
        Constant SenescenceRate: FixedValue=0
        BiomassRemoval BiomassRemovalDefaults
          OrganBiomassRemovalType Harvest: FractionLiveToRemove=0; FractionDeadToRemove=0; FractionLiveToResidue=0.98; FractionDeadToResidue=1
          OrganBiomassRemovalType Cut: FractionLiveToRemove=0; FractionDeadToRemove=0; FractionLiveToResidue=1; FractionDeadToResidue=1
          OrganBiomassRemovalType Prune: FractionLiveToRemove=0; FractionDeadToRemove=0; FractionLiveToResidue=0.46; FractionDeadToResidue=0.46
          OrganBiomassRemovalType Graze: FractionLiveToRemove=0; FractionDeadToRemove=0; FractionLiveToResidue=0; FractionDeadToResidue=0
          OrganBiomassRemovalType Thin: FractionLiveToRemove=0; FractionDeadToRemove=0; FractionLiveToResidue=0; FractionDeadToResidue=0
        Constant LeafResidenceTime: FixedValue=184
        Constant DMConversionEfficiency: FixedValue=1
        Constant LeafDetachmentTime: FixedValue=3
        Constant DMRetranslocationFactor: FixedValue=0
        Constant NRetranslocationFactor: FixedValue=0
        Constant LeafKillFraction: FixedValue=0
        Constant MinimumLAI: FixedValue=0.1
        Constant SpecificLeafAreaFunction: FixedValue=0.01; Units=m^2/g
          Memo
            0.0232 m2/g from R.B. Thomas 1, D.D. Richter 2, H. Ye 2, P.R. Heine z, and B.R. Strain 1 Nitrogen dynamics and growth of seedlings of an N-fixing tree
            (GKricidia sepium (Jacq.) Walp.) exposed to elevated atmospheric carbon dioxide Oecologia (1991) 88:415-421

            Value of 0.0195 for whole leaf or 0.024 for leaf lamina from Leaf area index estimates obtained for clumped canopies
            using hemispherical photography
            P.R. van Gardingen*, G.E. Jackson, S. Hernandez-Daumas, G. Russell, L. Sharp
            Agricultural and Forest Meteorology 94 (1999) 243±257
        Constant CarbonConcentration: FixedValue=0.4
        Constant LeafDevelopmentRate: FixedValue=1
        BiomassDemand DMDemands
          MultiplyFunction Structural
            PartitionFractionDemandFunction DMDemandFunction
              Constant PartitionFraction: FixedValue=0.29
            Constant StructuralFraction: FixedValue=1
          Constant Metabolic: FixedValue=0
          StorageDMDemandFunction Storage
            SubtractFunction StorageFraction
              Constant One: FixedValue=1
              VariableReference StructuralFraction: VariableName=[Leaf].DMDemands.Structural.StructuralFraction
        BiomassDemand NDemands
          MultiplyFunction Structural
            VariableReference MinNconc: VariableName=[Leaf].minimumNconc
            VariableReference PotentialDMAllocation: VariableName=[Leaf].potentialDMAllocation.Structural
          MultiplyFunction Metabolic
            SubtractFunction MetabolicNconc
              VariableReference CritNconc: VariableName=[Leaf].criticalNConc
              VariableReference MinNconc: VariableName=[Leaf].minimumNconc
            VariableReference PotentialDMAllocation: VariableName=[Leaf].potentialDMAllocation.Structural
          StorageNDemandFunction Storage
            VariableReference MaxNconc: VariableName=[Leaf].MaximumNConc
            Constant NitrogenDemandSwitch: FixedValue=1
        Constant StomatalConductanceCO2Modifier: FixedValue=1
      Root: GrowthRespiration=0; MaintenanceRespiration=0; RootAngle=45
        PhaseBasedSwitch NitrogenDemandSwitch: Start=Emergence; End=Old
        Constant RootFrontVelocity: FixedValue=10
        Constant SenescenceRate: FixedValue=0.005
        Constant MaximumNConc: FixedValue=0.03
          Memo
            0.02 gN/g for seedlings from R.B. Thomas 1, D.D. Richter 2, H. Ye 2, P.R. Heine z, and B.R. Strain 1 Nitrogen dynamics and growth of seedlings of an N-fixing tree
            (GKricidia sepium (Jacq.) Walp.) exposed to elevated atmospheric carbon dioxide Oecologia (1991) 88:415-421
        Constant MinimumNConc: FixedValue=0.01
        Constant MaxDailyNUptake: FixedValue=6
        Constant MaximumRootDepth: FixedValue=1000000
        LinearInterpolationFunction KLModifier
          XYPairs: X=[0, 3]; Y=[1, 1]
          VariableReference XValue: VariableName=[Leaf].LAI
        LinearInterpolationFunction KNO3
          XYPairs: X=[0, 0.003]; Y=[0.03, 0.03]
          VariableReference XValue: VariableName=[Root].LengthDensity
        LinearInterpolationFunction KNH4
          XYPairs: X=[0, 0.003]; Y=[0, 0]
          VariableReference XValue: VariableName=[Root].LengthDensity
        LinearInterpolationFunction NUptakeSWFactor
          XYPairs: X=[0, 1]; Y=[0, 1]
          VariableReference XValue: VariableName=[Root].RWC
        Constant InitialDM: FixedValue=5; Units=g/plant
        Constant SpecificRootLength: FixedValue=100; Units=m/g
        BiomassRemoval BiomassRemovalDefaults
          OrganBiomassRemovalType Harvest: FractionLiveToRemove=0; FractionDeadToRemove=0; FractionLiveToResidue=0; FractionDeadToResidue=0
          OrganBiomassRemovalType Cut: FractionLiveToRemove=0; FractionDeadToRemove=0; FractionLiveToResidue=0; FractionDeadToResidue=0
          OrganBiomassRemovalType Prune: FractionLiveToRemove=0; FractionDeadToRemove=0; FractionLiveToResidue=0; FractionDeadToResidue=0
          OrganBiomassRemovalType Graze: FractionLiveToRemove=0; FractionDeadToRemove=0; FractionLiveToResidue=0; FractionDeadToResidue=0
          OrganBiomassRemovalType Thin: FractionLiveToRemove=0; FractionDeadToRemove=0; FractionLiveToResidue=0; FractionDeadToResidue=0
        Constant DMConversionEfficiency: FixedValue=1
        Constant MaintenanceRespirationFunction: FixedValue=1
        Constant RemobilisationCost: FixedValue=0
        Constant CarbonConcentration: FixedValue=0.4
        BiomassDemand DMDemands
          MultiplyFunction Structural
            PartitionFractionDemandFunction DMDemandFunction
              Constant PartitionFraction: FixedValue=0.03
            Constant StructuralFraction: FixedValue=0.7; Units=g/g
          Constant Metabolic: FixedValue=0
          StorageDMDemandFunction Storage
            SubtractFunction StorageFraction
              Constant One: FixedValue=1
              VariableReference StructuralFraction: VariableName=[Root].DMDemands.Structural.StructuralFraction
        BiomassDemand NDemands
          MultiplyFunction Structural
            VariableReference MinNconc: VariableName=[Root].minimumNconc
            VariableReference PotentialDMAllocation: VariableName=[Root].potentialDMAllocation.Structural
          MultiplyFunction Metabolic
            SubtractFunction MetabolicNconc
              VariableReference CritNconc: VariableName=[Root].criticalNConc
              VariableReference MinNconc: VariableName=[Root].minimumNconc
            VariableReference PotentialDMAllocation: VariableName=[Root].potentialDMAllocation.Structural
          StorageNDemandFunction Storage
            VariableReference NitrogenDemandSwitch: VariableName=[Root].nitrogenDemandSwitch
            VariableReference MaxNconc: VariableName=[Root].maximumNconc
      GenericOrgan Stem: IsAboveGround=true
        Constant NReallocationFactor: FixedValue=0
        Constant NRetranslocationFactor: FixedValue=0.05
        PhaseBasedSwitch NitrogenDemandSwitch: Start=Emergence; End=Old
        Constant DMRetranslocationFactor: FixedValue=0
        Constant SenescenceRate: FixedValue=0; Units=/d
        Constant MaximumNConc: FixedValue=0.003
          Memo
            0.03 gN/g for seedlings from R.B. Thomas 1, D.D. Richter 2, H. Ye 2, P.R. Heine z, and B.R. Strain 1 Nitrogen dynamics and growth of seedlings of an N-fixing tree
            (GKricidia sepium (Jacq.) Walp.) exposed to elevated atmospheric carbon dioxide Oecologia (1991) 88:415-421
        Constant MinimumNConc: FixedValue=0.0014
        Constant InitialWtFunction: FixedValue=1; Units=g/m^2
        Constant DetachmentRateFunction: FixedValue=0; Units=/d
        BiomassRemoval BiomassRemovalDefaults
          OrganBiomassRemovalType Harvest: FractionLiveToRemove=0; FractionDeadToRemove=0; FractionLiveToResidue=0.7; FractionDeadToResidue=0.7
          OrganBiomassRemovalType Cut: FractionLiveToRemove=0; FractionDeadToRemove=0; FractionLiveToResidue=0.1; FractionDeadToResidue=0
          OrganBiomassRemovalType Prune: FractionLiveToRemove=0; FractionDeadToRemove=0; FractionLiveToResidue=0; FractionDeadToResidue=0
          OrganBiomassRemovalType Graze: FractionLiveToRemove=0; FractionDeadToRemove=0; FractionLiveToResidue=0; FractionDeadToResidue=0
          OrganBiomassRemovalType Thin: FractionLiveToRemove=0; FractionDeadToRemove=0; FractionLiveToResidue=0; FractionDeadToResidue=0
        Constant MaintenanceRespirationFunction: FixedValue=0; Units=0-1
        Constant DMConversionEfficiency: FixedValue=1; Units=0-1
        Constant DMReallocationFactor: FixedValue=0
        VariableReference CriticalNConc: VariableName=[Stem].MinimumNConc
        Constant RemobilisationCost: FixedValue=0
        Constant CarbonConcentration: FixedValue=0.4
        BiomassDemand DMDemands
          MultiplyFunction Structural
            AllometricDemandFunction DMDemandFunction: Const=0.0345; Power=1.36
              VariableReference XValue: VariableName=[AboveGround].Wt
              VariableReference YValue: VariableName=[Stem].Live.Wt
            Constant StructuralFraction: FixedValue=0.7; Units=g/g
          Constant Metabolic: FixedValue=0
          StorageDMDemandFunction Storage
            SubtractFunction StorageFraction
              Constant One: FixedValue=1
              VariableReference StructuralFraction: VariableName=[Stem].DMDemands.Structural.StructuralFraction
        BiomassDemand NDemands
          MultiplyFunction Structural
            VariableReference MinNconc: VariableName=[Stem].minimumNconc
            VariableReference PotentialDMAllocation: VariableName=[Stem].potentialDMAllocation.Structural
          MultiplyFunction Metabolic
            SubtractFunction MetabolicNconc
              VariableReference CritNconc: VariableName=[Stem].criticalNConc
              VariableReference MinNconc: VariableName=[Stem].minimumNconc
            VariableReference PotentialDMAllocation: VariableName=[Stem].potentialDMAllocation.Structural
          StorageNDemandFunction Storage
            VariableReference NitrogenDemandSwitch: VariableName=[Stem].nitrogenDemandSwitch
            VariableReference MaxNconc: VariableName=[Stem].maximumNconc
        RetranslocateNonStructural RetranslocateNitrogen
      Nodule
        Constant FixationMetabolicCost: FixedValue=0
        Constant MaximumNConc: FixedValue=0.08
        Constant MinimumNConc: FixedValue=0.03
        Constant SenescenceRate: FixedValue=0
        Constant NReallocationFactor: FixedValue=0
        PhaseBasedSwitch NitrogenDemandSwitch: Start=Emergence; End=Maturity
        BiomassRemoval BiomassRemovalDefaults
          OrganBiomassRemovalType Harvest: FractionLiveToRemove=0; FractionDeadToRemove=0; FractionLiveToResidue=0; FractionDeadToResidue=0
          OrganBiomassRemovalType Cut: FractionLiveToRemove=0; FractionDeadToRemove=0; FractionLiveToResidue=0; FractionDeadToResidue=0
          OrganBiomassRemovalType Prune: FractionLiveToRemove=0; FractionDeadToRemove=0; FractionLiveToResidue=0; FractionDeadToResidue=0
          OrganBiomassRemovalType Graze: FractionLiveToRemove=0; FractionDeadToRemove=0; FractionLiveToResidue=0; FractionDeadToResidue=0
        Constant InitialWtFunction: FixedValue=0.1; Units=g/m^2
        Constant DetachmentRateFunction: FixedValue=0; Units=/d
        Constant MaintenanceRespirationFunction: FixedValue=0; Units=0-1
        Constant DMConversionEfficiency: FixedValue=1; Units=0-1
        Constant FixationRate: FixedValue=10000; Units=g/m^2/d
        MultiplyFunction FixationRateNEW
          LinearInterpolationFunction NitrogenStressFactor
            XYPairs: X=[0, 0.7, 1]; Y=[1, 1, 0.5]
            VariableReference XValue: VariableName=[Leaf].Fn
          Constant: FixedValue=2
        Constant NRetranslocationFactor: FixedValue=0
        Constant DMReallocationFactor: FixedValue=0
        Constant DMRetranslocationFactor: FixedValue=0
        VariableReference CriticalNConc: VariableName=[Nodule].MinimumNConc
        Constant RemobilisationCost: FixedValue=0
        Constant CarbonConcentration: FixedValue=0.4
        BiomassDemand DMDemands
          MultiplyFunction Structural
            PartitionFractionDemandFunction DMDemandFunction
              Constant PartitionFraction: FixedValue=0.05
            Constant StructuralFraction: FixedValue=1; Units=g/g
          Constant Metabolic: FixedValue=0
          StorageDMDemandFunction Storage
            SubtractFunction StorageFraction
              Constant One: FixedValue=1
              VariableReference StructuralFraction: VariableName=[Nodule].DMDemands.Structural.StructuralFraction
        BiomassDemand NDemands
          MultiplyFunction Structural
            VariableReference MinNconc: VariableName=[Nodule].minimumNconc
            VariableReference PotentialDMAllocation: VariableName=[Nodule].potentialDMAllocation.Structural
          MultiplyFunction Metabolic
            SubtractFunction MetabolicNconc
              VariableReference CritNconc: VariableName=[Nodule].criticalNConc
              VariableReference MinNconc: VariableName=[Nodule].minimumNconc
            VariableReference PotentialDMAllocation: VariableName=[Nodule].potentialDMAllocation.Structural
          StorageNDemandFunction Storage
            VariableReference NitrogenDemandSwitch: VariableName=[Nodule].nitrogenDemandSwitch
            VariableReference MaxNconc: VariableName=[Nodule].maximumNconc
      Cultivar Gliricidia
      Cultivar GliricidiaYoung
        Command=[Gliricidia].Stem.DMDemands.Structural.DMDemandFunction.Const=0.05
  DataStore
    ExcelInput Observed: FileName=Observed.xlsx; SheetNames=[Observed, ObservedGliricidia, ObservedSoil]
      Memo
        Makoka Observed Gliricidia Biomass data were derived from:
        Makumba et al 2006 Fig. 2 annual biomass of leaf(+green branch) 1993-2003
        Akinnifiessi et al 2006 Fig. 1 annual stem wood and leaf(+green branch) 1992/93-2001/02,
        			Table 2 (seasonal spread for nutrient weight 1997/98 and 1998/1999)
        Makumba et al 2007 Table 1 annual C (2x = biomass) 1993-2002
        Excel files of raw data from Sileshi for individual harvests 2003-2005
    PredictedObserved: PredictedTableName=MaizeHarvestReport; ObservedTableName=Observed; FieldNameUsedForMatch=Year; FieldName2UsedForMatch=SimulationID
    PredictedObserved PredictedObservedSoil: PredictedTableName=MaizeDailyReport; ObservedTableName=ObservedSoil; FieldNameUsedForMatch=Clock.Today
    PredictedObserved PredictedObservedGliricidia: PredictedTableName=GliricidiaDailyReport; ObservedTableName=ObservedGliricidia; FieldNameUsedForMatch=Clock.Today
    Probability: TableName=MaizeHarvestReport; Exceedence=true; FieldToSplitOn=SimulationName
  Folder Validation
    Experiment Hamakuapoko
      Factors
        Factor Harvest: Specification=[Operations]
          Operations Nil
      Simulation HamakuapokoBase
        Clock: Start=1988-05-22; End=1990-05-22
        Summary SummaryFile
        Weather: FileName=Hamakuapoko.met
        SoilArbitrator Soil Arbitrator
        Zone: Area=1; Slope=0; AspectAngle=0; Altitude=50
          Soil Hamakuapoko Soil: LocalName=Paia Silty Clay; Region=Maui; State=HI; Country=USA; Latitude=20.894444; Longitude=156.363888; DataSource=NRCS 1976; Comments=NRCS 1976 Soil Survey . . . of Hawaii, p. 110-111
            Site=c. 90 m south of Kaheka Rd, south-east of Sunny Side and Kaheka Rds, Maui
            Physical
              Thickness  BD   AirDry  LL15  DUL   SAT
              230        1.4  0.16    0.18  0.35  0.47
              400        1.3  0.17    0.2   0.35  0.5
              350        1    0.18    0.22  0.28  0.55
              500        1    0.21    0.23  0.29  0.59
              270        1    0.23    0.26  0.32  0.59
              130        1    0.23    0.26  0.31  0.59
              SoilCrop MaizeSoil: LL=[0.17, 0.18, 0.19, 0.22, 0.25, 0.25]; KL=[0.08, 0.08, 0.08, 0.08, 0.06, 0.04]; XF=[1, 1, 1, 1, 1, 1]
              SoilCrop GliricidiaSoil: LL=[0.17, 0.18, 0.19, 0.22, 0.24, 0.24]; KL=[0.08, 0.08, 0.08, 0.08, 0.06, 0.04]; XF=[1, 1, 1, 1, 1, 1]
            SoilWater: SummerDate=1-May; SummerU=9; SummerCona=2.5; WinterDate=1-Oct; WinterU=9; WinterCona=2.5; DiffusConst=40; DiffusSlope=16; Salb=0.13; CN2Bare=65; CNRed=20; CNCov=0.8; slope=0.04; max_pond=0; PrecipitationInterception=0
              Thickness  SWCON  KLAT
              230        0.5    0
              400        0.5    0
              350        0.5    0
              500        0.5    0
              270        0.5    0
              130        0.5    0
            SoilNitrogen: fom_types=[default, manure, mucuna, lablab, shemp, stable]; fract_carb=[0.2, 0.3, 0.54, 0.57, 0.45, 0]; fract_cell=[0.7, 0.3, 0.37, 0.37, 0.47, 0.1]; fract_lign=[0.1, 0.4, 0.09, 0.06, 0.08, 0.9]
              SoilNitrogenNO3 NO3
              SoilNitrogenNH4 NH4
              SoilNitrogenUrea Urea
              SoilNitrogenPlantAvailableNO3 PlantAvailableNO3
              SoilNitrogenPlantAvailableNH4 PlantAvailableNH4
            Organic: FOMCNRatio=40
              Thickness  Carbon  SoilCNRatio  FBiom  FInert  FOM
              230        2.4     11           0.08   0.2     188.085
              400        2.4     11           0.08   0.2     99.3447
              350        2.4     11           0.08   0.4     56.8311
              500        1.2     11           0.04   0.4     25.5903
              270        0.6     11           0.03   0.4     16.6325
              130        0.3     11           0.02   0.4     13.5165
            Chemical
              Thickness  NO3N  NH4N  PH
              230        20    1     5.2
              400        1     0.5   5.2
              350        0.5   0.2   5.2
              500        0.2   0.1   5.2
              270        0.1   0.1   5.2
              130        0.1   0.1   5.2
            Sample: Thickness=[230, 400, 350, 500, 270, 130]; SW=[0.23, 0.23, 0.23, 0.23, 0.23, 0.23]; SWUnits=Volumetric; OCUnits=Total; PHUnits=Water
            CERESSoilTemperature
          MicroClimate: a_interception=0; b_interception=0; c_interception=0; d_interception=0; soil_albedo=0.23; SoilHeatFluxFraction=0.4; NightInterceptionFraction=0.5; ReferenceHeight=2
          Irrigation
          Report GliricidiaDailyReport: EventNames=[Clock].DoReport
            VariableNames:
              [Clock].Today
              [Zone].Area
              [Soil].SoilWater.Es
              sum([Soil].SoilNitrogen.NO3.kgha) as TotalNO3N
              sum([Soil].SoilNitrogen.NH4.kgha) as TotalNH4N
              sum([Soil].SoilWater.SWmm) as SWTotal
              [Soil].SoilWater.SW[2] as SW30cm
              [Soil].SoilWater.SW[3] as SW50cm
              [Soil].SoilWater.SW[4] as SW70cm
              [Soil].FInert[1] as FInert10cm
              [Soil].SoilNitrogen.OC[1] as SOC10cm
              [Soil].SoilNitrogen.OC[2] as SOC30cm
              [Soil].SoilNitrogen.OC[3] as SOC50cm
              [Soil].SoilNitrogen.OC[4] as SOC70cm
              [Soil].SoilNitrogen.OC[5] as SOC90cm
              [Soil].SoilNitrogen.OC[6] as SOC110cm
              [Soil].SoilNitrogen.NO3.kghappm[1] as NO3ppm10cm
              [Soil].SoilNitrogen.NO3.kghappm[2] as NO3ppm30cm
              [Soil].SoilNitrogen.NO3.kghappm[3] as NO3ppm50cm
              [Soil].SoilNitrogen.NO3.kgha[1] as NO3kgpha10cm
              [Soil].SoilNitrogen.NO3.kgha[2] as NO3kgpha30cm
              [Soil].SoilNitrogen.NO3.kgha[3] as NO3kgpha50cm
              [Soil].SoilNitrogen.dlt_n_min_res[1] as NNM10cm
              [MicroClimate].peta
              [MicroClimate].petr
              [Soil].SoilWater.Eo
              [Soil].FBiom[1] as FBiom10cm
              [Soil].SoilWater.SW[1] as SurfaceSW
              [SurfaceOrganicMatter].Wt
              sum([Soil].SoilNitrogen.FOMN) as FOMN
              sum([Soil].SoilNitrogen.HumicN) as HumicN
              sum([Soil].SoilNitrogen.MicrobialN) as MicrobialN
              [Soil].SoilNitrogen.MicrobialN[1] as MicrobialN1
              [Soil].SoilNitrogen.MicrobialN[2] as MicrobialN2
              [Soil].SoilNitrogen.MicrobialN[3] as MicrobialN3
              [Gliricidia].Leaf.LAI
              [Gliricidia].Leaf.Fn
              [Gliricidia].Leaf.Live.NConc
              [Gliricidia].Leaf.MaximumNConc.FixedValue
              [Gliricidia].Leaf.MinimumNConc.FixedValue
              [Gliricidia].Leaf.Fw
              [Gliricidia].Leaf.Live.Wt
              [Gliricidia].Leaf.Live.Wt
              [Gliricidia].Stem.Live.Wt
              [Gliricidia].Root.Live.Wt
              [Gliricidia].Root.TotalDMDemand
              [Gliricidia].Stem.DMDemands.Structural.DMDemandFunction.Value
              [Gliricidia].Leaf.DMDemands.Structural.DMDemandFunction.Value
              [Gliricidia].Root.PartitionFraction.Value
              [Gliricidia].AboveGround.Wt
              [Gliricidia].Leaf.CoverGreen
              [Gliricidia].Nodule.FixationRate
              [Gliricidia].Nodule.NFixed
              [Gliricidia].Stem.Live.StorageWt
              [Gliricidia].Stem.Live.StructuralWt
              [Gliricidia].Stem.Live.StorageN
              [Gliricidia].Stem.Live.StructuralN
              [Gliricidia].Leaf.Photosynthesis
              [Gliricidia].Leaf.DMDemands.Structural.DMDemandFunction
              [Gliricidia].Stem.DMDemands.Structural.DMDemandFunction
              [Gliricidia].Root.DMDemands.Structural.DMDemandFunction
              [Gliricidia].Stem.DemandedDMStructural
              [Gliricidia].Stem.DemandedDMNonStructural
          Report GlircidiaAnnualOutput: EventNames=[Clock].EndOfYear
            VariableNames:
              [Clock].Today
              [Clock].Today.Year
              [Gliricidia].Age
              [Gliricidia].LAI
              sum of [Gliricidia].Nodule.NFixed from 1-Jan to 31-Dec as AnnualNFixed
          Fertiliser
          SurfaceOrganicMatter: InitialResidueName=maize_stubble; InitialResidueType=maize; InitialResidueMass=0; InitialStandingFraction=0; InitialCPR=400; InitialCNR=80; FractionFaecesAdded=1
          Plant Gliricidia: CropType=Gliricidia; IsEnding=false; DaysAfterEnding=0
          Manager TreeSowingRule
            RowSpace = 1
            RowWidth = 2
            CultivarName = Gliricidia
            SowingDate = 05/22/1988 00:00:00
```csharp
using System;
using Models.Core;
using Models.PMF;
namespace Models
{
    [Serializable] 
    [System.Xml.Serialization.XmlInclude(typeof(Model))]
    public class Script : Model
    {
        [Link] Plant Gliricidia;
        [Link] Clock Clock;

        [Description("Spacing (m) between plants within rows")]
        public double RowSpace { get; set; }
        [Description("Spacing (m) between rows")]
        public double RowWidth { get; set; }

        [Description("Cultivar")]
        public string CultivarName { get; set; }
        [Description("Sowing Date")]
        public DateTime SowingDate { get; set; }

        [EventSubscribe("DoManagement")]
        private void OnDoManagement(object sender, EventArgs e)
        {
            double PlantPopulation = 1 / (RowWidth * RowSpace);

            if (Clock.Today.Date == SowingDate)
                Gliricidia.Sow(population: PlantPopulation, 
                    cultivar: CultivarName, 
                    depth: 100, 
                    rowSpacing: 150);
            //Plant.Sow(... Contains the following arguements:
            //Population  double  Required  Seeds sowing/m2
            //Cultivar    string  Required  "NameOfCultivar"
            //Depth       double  Optional  Depth (mm) seed sown.   Default is 100mm 
            //MaxCover    double  Optional  Proportion (0-1) of the ground row crop will cover.   Default is 1.0
            //BudNumber   double  Optional  Number of mainstems per seed sown.  Default is 1.0
            //RowSpacing  double  Optional  Spaceing (mm) between drill rows when crop is sown.  Default is 150mm
            //CropClass   string  Optional  Crop class to instantiate when crop is sown.  Default is "Plant"
        }
    }
}
```
          Manager Automatic irrigation based on water deficit
            FASW = 0
            WaterDeficit = 0
            AutoIrrigationOn = True
            FASWThreshold = 0.5
            FASWDepth = 600
```csharp
using System;
using Models.Core;
using System.Collections.Generic;
using System.Text;
using Models.Soils;
using Models.PMF;
using Models;
using System.Xml.Serialization;
using APSIM.Shared.Utilities;

namespace Models
{
    [Serializable] 
    public class Script : Model
    {
        public double FASW { get; set; }
        public double WaterDeficit  { get; set; }
    
        [Link] Zone zone;
        [Link] Irrigation irrigation;
        [Link] Soil soil;
        
        [Description("Auto irrigation on?")]
        public bool AutoIrrigationOn { get; set; }

        [Description("Threshold fraction available water (0-1)")]
        public double FASWThreshold { get; set; }

        [Description("Soil depth (mm) to which fraction available water is calculated")]
        public double FASWDepth { get; set; }

        [EventSubscribe("DoManagement")]
        private void OnDoManagement(object sender, EventArgs e)
        {
            CalculateFASW();
            if (AutoIrrigationOn)
            {
                if (FASW < FASWThreshold)
                {
                    double amount = 10;
                    irrigation.Apply(WaterDeficit, depth: 0);
                }
            }
        }
        
        private void CalculateFASW()
        {
            double[] LL15 = MathUtilities.Multiply(soil.LL15, soil.Thickness);
            double[] DUL = MathUtilities.Multiply(soil.DUL, soil.Thickness);
        
            int nlayr = GetLayerIndex();
            double cumdep = MathUtilities.Sum(soil.Thickness, 0, nlayr, 0.0);

            double excess_fr = MathUtilities.Divide((cumdep - FASWDepth), soil.Thickness[nlayr], 0.0);

            // note that results may be strange if swdep < ll15
            double avail_sw = (MathUtilities.Sum(soil.Water, 0, nlayr, 0.0)
                              - excess_fr * soil.Water[nlayr])
                              - (MathUtilities.Sum(LL15, 0, nlayr, 0.0)
                              - excess_fr * LL15[nlayr]);


            double pot_avail_sw = (MathUtilities.Sum(DUL, 0, nlayr, 0.0)
                                  - excess_fr * DUL[nlayr])
                                  - (MathUtilities.Sum(LL15, 0, nlayr, 0.0)
                                  - excess_fr * LL15[nlayr]);

            FASW = MathUtilities.Divide(avail_sw, pot_avail_sw, 0.0);
            WaterDeficit = MathUtilities.Constrain(pot_avail_sw - avail_sw, 0.0, 100000);
        }

        private int GetLayerIndex()
        {
            double[] cumThickness = soil.ThicknessCumulative;
            for (int i = 1; i < cumThickness.Length; i++)
            {
                if (FASWDepth < cumThickness[i])
                    return i - 1;
            }
            
            return cumThickness.Length - 1;
        }

    }
}
```
          Manager CuttingManagement: same as Replacements.CuttingManagement
          Operations
    Experiment Guadeloupe
      Memo
        This trial was conducted at Gatton in 1995 using the local variety, Hartog.  It consisted of 4 Nitrogen rates (0,40,80,160) with two irrigation rates (minimal amount for establishment, fully irrigated).  Yields ranged from 1.4 t/ha to 5.4 t/ha.
      Factors
        Factor Harvest: Specification=[Operations]
          Operations 12Month
            1996-04-29  [CuttingManagement].Script.DoCut(62, 25);
            1996-08-30  [Gliricidia].Leaf.LeafKillFraction=0.8
            1996-08-30  [Gliricidia].Leaf.SenescenceRate=0.8
            1997-02-28  [CuttingManagement].Script.DoCut(1,1);
          Operations 06Month
            1996-04-29  [CuttingManagement].Script.DoCut(44, 25);
            1996-08-13  [CuttingManagement].Script.DoCut(10, 25);
            1997-01-31  [CuttingManagement].Script.DoCut(10, 25);
            1997-02-28  [CuttingManagement].Script.DoCut(1,1);
          Operations 02Month
            1996-04-29  [CuttingManagement].Script.DoCut(12, 25);
            1996-06-20  [CuttingManagement].Script.DoCut(41, 25);
            1996-08-13  [CuttingManagement].Script.DoCut(39, 25);
            1996-10-10  [CuttingManagement].Script.DoCut(11, 25);
            1996-12-01  [CuttingManagement].Script.DoCut(20, 25);
            1997-01-31  [CuttingManagement].Script.DoCut(10, 10);
            1997-02-28  [CuttingManagement].Script.DoCut(1,1);
      Simulation GuadeloupeBase
        Clock: Start=1993-05-01; End=1997-02-28
        Summary SummaryFile
        Weather: FileName=Guadeloupe.met
        SoilArbitrator Soil Arbitrator
        Zone: Area=1; Slope=0; AspectAngle=0; Altitude=50
          Soil Guadeloupe Soil: NearestTown=Prise d'Eau; Country=Guadeloupe; Latitude=16.2; Longitude=61.65
            DataSource=Nygren and Cruz 1998 Biomass allocation . . . . Agrof. Sys 41:277-292; Sierra etal 2003 application of STICS Plant Soil 256:333-345
            Physical
              Thickness  BD    AirDry  LL15  DUL   SAT
              100        0.92  0.16    0.21  0.39  0.55
              200        1.01  0.17    0.23  0.42  0.58
              200        1.03  0.17    0.26  0.48  0.58
              500        1.09  0.17    0.3   0.51  0.58
              500        1.09  0.17    0.3   0.51  0.58
              500        1.09  0.17    0.3   0.51  0.58
              SoilCrop MaizeSoil: LL=[0.17, 0.18, 0.19, 0.19, 0.19, 0.19]; KL=[0.08, 0.08, 0.08, 0.08, 0.08, 0.08]; XF=[1, 1, 1, 1, 1, 1]
              SoilCrop GliricidiaSoil: LL=[0.17, 0.18, 0.19, 0.19, 0.19, 0.19]; KL=[0.08, 0.08, 0.06, 0.06, 0.06, 0.06]; XF=[0.1, 0.1, 0.1, 0.1, 0.1, 0.1]
            SoilWater: SummerDate=1-May; SummerU=9; SummerCona=2.5; WinterDate=1-Oct; WinterU=9; WinterCona=2.5; DiffusConst=40; DiffusSlope=16; Salb=0.13; CN2Bare=65; CNRed=20; CNCov=0.8; max_pond=0; Thickness=[200, 1800]; SWCON=[0.5, 0.5]; PrecipitationInterception=0
            SoilNitrogen: same as Validation.Hamakuapoko.HamakuapokoBase.Zone.Hamakuapoko Soil.SoilNitrogen
            Organic: FOMCNRatio=40
              Thickness  Carbon  SoilCNRatio  FBiom  FInert  FOM
              100        3.92    14.6         0.06   0.5     170.396
              200        3.5     14.6         0.06   0.5     126.232
              200        2.61    14.6         0.06   0.5     93.5153
              1500       1       14.6         0.06   0.5     9.85644
            Chemical
              Thickness  NO3N  NH4N  PH
              100        15    10    6
              200        10    6     6
              200        5     3     6.1
              1500       1     0.5   4.5
            Sample: Thickness=[100, 200, 200, 1500]; SW=[0.25, 0.25, 0.25, 0.25]; SWUnits=Volumetric; OCUnits=Total; PHUnits=Water
            CERESSoilTemperature
          MicroClimate: a_interception=0; b_interception=0; c_interception=0; d_interception=0; soil_albedo=0.23; SoilHeatFluxFraction=0.4; NightInterceptionFraction=0.5; ReferenceHeight=2
          Report GliricidiaDailyReport: EventNames=[Clock].DoReport
            VariableNames:
              [Clock].Today
              [Zone].Area
              [Soil].SoilWater.Es
              sum([Soil].SoilNitrogen.NO3.kgha) as TotalNO3N
              sum([Soil].SoilNitrogen.NH4.kgha) as TotalNH4N
              sum([Soil].SoilWater.SWmm) as SW200cm
              [Soil].SoilWater.SW[2] as SW30cm
              [Soil].SoilWater.SW[3] as SW50cm
              [Soil].SoilWater.SW[4] as SW70cm
              [Soil].FInert[1] as FInert10cm
              [Soil].SoilNitrogen.OC[1] as SOC10cm
              [Soil].SoilNitrogen.OC[2] as SOC30cm
              [Soil].SoilNitrogen.OC[3] as SOC50cm
              [Soil].SoilNitrogen.OC[4] as SOC70cm
              [Soil].SoilNitrogen.OC[5] as SOC90cm
              [Soil].SoilNitrogen.OC[6] as SOC110cm
              [Soil].SoilNitrogen.NO3.kghappm[1] as NO3ppm10cm
              [Soil].SoilNitrogen.NO3.kghappm[2] as NO3ppm30cm
              [Soil].SoilNitrogen.NO3.kghappm[3] as NO3ppm50cm
              [Soil].SoilNitrogen.NO3.kgha[1] as NO3kgpha10cm
              [Soil].SoilNitrogen.NO3.kgha[2] as NO3kgpha30cm
              [Soil].SoilNitrogen.NO3.kgha[3] as NO3kgpha50cm
              [Soil].SoilNitrogen.dlt_n_min_res[1] as NNM10cm
              [MicroClimate].peta
              [MicroClimate].petr
              [Soil].SoilWater.Eo
              [Soil].FBiom[1] as FBiom10cm
              [Soil].SoilWater.SW[1] as SurfaceSW
              [SurfaceOrganicMatter].Wt
              sum([Soil].SoilNitrogen.FOMN) as FOMN
              sum([Soil].SoilNitrogen.HumicN) as HumicN
              sum([Soil].SoilNitrogen.MicrobialN) as MicrobialN
              [Soil].SoilNitrogen.MicrobialN[1] as MicrobialN1
              [Soil].SoilNitrogen.MicrobialN[2] as MicrobialN2
              [Soil].SoilNitrogen.MicrobialN[3] as MicrobialN3
              [Gliricidia].Leaf.LAI
              [Gliricidia].Leaf.FRGR
              [Gliricidia].Leaf.Live.Wt
              [Gliricidia].Stem.Live.Wt
              [Gliricidia].Root.Live.Wt
              [Gliricidia].Root.TotalDMDemand
              [Gliricidia].Stem.DMDemands.Structural.DMDemandFunction.Value
              [Gliricidia].Leaf.DMDemands.Structural.DMDemandFunction.Value
              [Gliricidia].Root.PartitionFraction.Value
              [Gliricidia].AboveGround.Wt
              [Gliricidia].Leaf.CoverGreen
              [Gliricidia].Nodule.NFixed
              [Gliricidia].Leaf.Fn
              [Gliricidia].Leaf.Fw
          Fertiliser
          SurfaceOrganicMatter: InitialResidueName=maize_stubble; InitialResidueType=maize; InitialResidueMass=0; InitialStandingFraction=0; InitialCPR=400; InitialCNR=80; FractionFaecesAdded=1
          Plant Gliricidia: CropType=Gliricidia; IsEnding=false; DaysAfterEnding=0
          Manager TreeSowingRule
            RowSpace = 0.7
            RowWidth = 3
            CultivarName = Gliricidia
            SowingDate = 05/01/1993 00:00:00
            script: same as in Validation.Hamakuapoko.HamakuapokoBase.Zone.TreeSowingRule
          Operations
          Operations PreExperimentOperations
            1993-09-01  [CuttingManagement].Script.DoCut(20, 5);
            1994-01-01  [CuttingManagement].Script.DoCut(40, 40);
            1994-05-01  [CuttingManagement].Script.DoCut(40, 40);
            1994-09-01  [CuttingManagement].Script.DoCut(40, 40);
            1995-01-01  [CuttingManagement].Script.DoCut(40, 40);
            1995-05-01  [CuttingManagement].Script.DoCut(40, 40);
            1995-09-01  [CuttingManagement].Script.DoCut(40, 40);
            1996-01-01  [CuttingManagement].Script.DoCut(40, 40);
            1996-02-29  [CuttingManagement].Script.DoCut(40, 40);
          Manager CuttingManagement
            LeafRemovalWt = 0
            StemRemovalWt = 0
            TotalRemovalWt = 0
```csharp
using System;
using System.Collections.Generic;
using Models.Core;
using Models.PMF;
using Models.PMF.Interfaces;
using System.Xml.Serialization;

namespace Models
{
    [Serializable] 
    [System.Xml.Serialization.XmlInclude(typeof(Model))]
    public class Script : Model
    {
        [Link(ByName = true)] Plant Gliricidia;
        [Link] Clock Clock;

    
        [XmlIgnore] private RemovalFractions Remove { get; set; }

        [Description("Leaf Removal Wt")]
        public double LeafRemovalWt {get; set;}


        [Description("Stem Removal Wt")]
        public double StemRemovalWt {get; set;}

        [Description("Total Removal Wt")]
        public double TotalRemovalWt {get; set;}

        [EventSubscribe("Commencing")]
        private void OnSimulationCommencing(object sender, EventArgs e)
        {
            Remove = new RemovalFractions();
        }

        [EventSubscribe("StartOfDay")]
        private void OnStartOfDay(object sender, EventArgs e)
        {

        LeafRemovalWt = 0;
        StemRemovalWt = 0;
        }

        public void DoCut(double LeafResidue, double StemResidue)
        {
            double L = (double)Apsim.Get(Gliricidia, "Leaf.Live.Wt");
            double LeafRemovalFraction = 0;

            if (L > 0)
                LeafRemovalFraction = (L - LeafResidue) / L;
                LeafRemovalWt = (L - LeafResidue);
            if (LeafRemovalFraction < 0)
                LeafRemovalFraction = 0;
               
            double S = (double)Apsim.Get(Gliricidia, "Stem.Live.Wt");
            double StemRemovalFraction = 0;

            if (S > 0)
                StemRemovalFraction = (S - StemResidue) / S; 
                StemRemovalWt = (S - StemResidue);              
            if (StemRemovalFraction < 0)
                StemRemovalFraction = 0;
               
            Remove.SetFractionToRemove("Leaf", LeafRemovalFraction);
            Remove.SetFractionToRemove("Stem", StemRemovalFraction);
            Remove.SetFractionToResidue("Leaf", 0.0);
            Remove.SetFractionToResidue("Stem", 0.0);
            Gliricidia.RemoveBiomass("Cut", Remove);
        }
        
    }
}
```
    Experiment GuadeloupeGodet
      Memo Limitation
        These is currenlty (1/3/2017) no grass model inlcuded. Can we include a tropical grass model, with cuttings removed every 4-6 weeks?
      Memo LimitationFactors
        These harvests are currenlty (1/3/2017) full, but could reflect better the amounts of foliage and stem left.
      Factors
        Factor Harvest: Specification=[Operations]
          Operations 12Month
            1996-04-01  [CuttingManagement].Script.DoCut(10, 40);
            1997-03-31  [CuttingManagement].Script.DoCut(1,1);
          Operations 06Month
            1996-04-01  [CuttingManagement].Script.DoCut(10, 40);
            1996-09-19  [CuttingManagement].Script.DoCut(10, 40);
            1997-03-31  [CuttingManagement].Script.DoCut(1,1);
          Operations 02Month
            1996-04-01  [CuttingManagement].Script.DoCut(10, 40);
            1996-05-30  [CuttingManagement].Script.DoCut(65, 33);
            1996-07-25  [CuttingManagement].Script.DoCut(120, 126);
            1996-09-18  [CuttingManagement].Script.DoCut(102, 159);
            1996-11-18  [CuttingManagement].Script.DoCut(109, 218);
            1997-01-09  [CuttingManagement].Script.DoCut(37, 58);
            1997-03-10  [CuttingManagement].Script.DoCut(10, 10);
            1997-03-31  [CuttingManagement].Script.DoCut(1,1);
      Simulation GuadeloupeGodetBase
        Clock: Start=1989-05-01; End=1997-03-31
        Summary SummaryFile
        Weather: FileName=GuadeloupeGodet.met
        SoilArbitrator Soil Arbitrator
        Zone: Area=1; Slope=0; AspectAngle=0; Altitude=50
          Soil GuadeloupeGodet Soil: NearestTown=Godet; Country=Guadeloupe; Latitude=16.33; Longitude=-61.5; Comments=Soil depth ranged from 0.1 to 0.75 m
            DataSource=Nygren et al 2000 Influence of biomass harvesting . . . . Tree Physiol 20:41-48; Cruz 1997 Effecct of shade . . . Plant Soil 188:227-237; Tournebize et al 1996 Modelling evapotranspiration . . . Ag For Meteorol 81:255-272
            Physical
              Thickness  BD    AirDry  LL15  DUL   SAT
              100        0.92  0.05    0.08  0.39  0.55
              200        1.01  0.05    0.08  0.42  0.58
              200        1.01  0.05    0.08  0.42  0.58
              500        1.01  0.05    0.08  0.42  0.58
              SoilCrop MaizeSoil: LL=[0.1, 0.1, 0.1, 0.1]; KL=[0.08, 0.08, 0.08, 0.08]; XF=[1, 1, 1, 0.5]
              SoilCrop GliricidiaSoil: LL=[0.1, 0.1, 0.1, 0.1]; KL=[0.08, 0.8, 0.06, 0.06]; XF=[1, 1, 1, 0.5]
            SoilWater: SummerDate=1-May; SummerU=9; SummerCona=2.5; WinterDate=1-Oct; WinterU=9; WinterCona=2.5; DiffusConst=40; DiffusSlope=16; Salb=0.13; CN2Bare=65; CNRed=20; CNCov=0.8; max_pond=0; Thickness=[100, 200, 200, 500]; SWCON=[0.5, 0.5, 0.5, 0.5]; PrecipitationInterception=0
            SoilNitrogen: same as Validation.Hamakuapoko.HamakuapokoBase.Zone.Hamakuapoko Soil.SoilNitrogen
            Organic: FOMCNRatio=40
              Thickness  Carbon  SoilCNRatio  FBiom  FInert  FOM
              100        3       10.6         0.08   0.5     208.636
              200        2       10.6         0.08   0.5     114.502
              200        1       10.6         0.08   0.5     62.8401
              500        0.5     10.6         0.08   0.5     14.0215
            Chemical
              Thickness  NO3N  NH4N  PH
              100        15    10    8.1
              200        10    6     8.1
              200        5     3     8.1
              500        2     1     8.1
            Sample: Thickness=[100, 200, 200, 500]; SW=[0.25, 0.25, 0.25, 0.25]; SWUnits=Volumetric; OCUnits=Total; PHUnits=Water
            CERESSoilTemperature
          MicroClimate: a_interception=0; b_interception=0; c_interception=0; d_interception=0; soil_albedo=0.23; SoilHeatFluxFraction=0.4; NightInterceptionFraction=0.5; ReferenceHeight=2
          Report GliricidiaDailyReport: EventNames=[Clock].DoReport
            VariableNames:
              [Clock].Today
              [Zone].Area
              [Soil].SoilWater.Es
              sum([Soil].SoilNitrogen.NO3.kgha) as TotalNO3N
              sum([Soil].SoilNitrogen.NH4.kgha) as TotalNH4N
              sum([Soil].SoilWater.SWmm) as SW200cm
              [Soil].SoilWater.SW[2] as SW30cm
              [Soil].FInert[1] as FInert10cm
              [Soil].SoilNitrogen.OC[1] as SOC10cm
              [Soil].SoilNitrogen.OC[2] as SOC30cm
              [Soil].SoilNitrogen.NO3.kghappm[1] as NO3ppm10cm
              [Soil].SoilNitrogen.NO3.kghappm[2] as NO3ppm30cm
              [Soil].SoilNitrogen.NO3.kgha[1] as NO3kgpha10cm
              [Soil].SoilNitrogen.NO3.kgha[2] as NO3kgpha30cm
              [Soil].SoilNitrogen.dlt_n_min_res[1] as NNM10cm
              [MicroClimate].peta
              [MicroClimate].petr
              [Soil].SoilWater.Eo
              [Soil].FBiom[1] as FBiom10cm
              [Soil].SoilWater.SW[1] as SurfaceSW
              [SurfaceOrganicMatter].Wt
              sum([Soil].SoilNitrogen.FOMN) as FOMN
              sum([Soil].SoilNitrogen.HumicN) as HumicN
              sum([Soil].SoilNitrogen.MicrobialN) as MicrobialN
              [Soil].SoilNitrogen.MicrobialN[1] as MicrobialN1
              [Soil].SoilNitrogen.MicrobialN[2] as MicrobialN2
              [Gliricidia].Leaf.LAI
              [Gliricidia].Leaf.FRGR
              [Gliricidia].Leaf.Live.Wt
              [Gliricidia].Stem.Live.Wt
              [Gliricidia].Root.Live.Wt
              [Gliricidia].Root.TotalDMDemand
              [Gliricidia].Stem.DMDemands.Structural.DMDemandFunction.Value
              [Gliricidia].Leaf.DMDemands.Structural.DMDemandFunction.Value
              [Gliricidia].Root.PartitionFraction.Value
              [Gliricidia].AboveGround.Wt
              [Gliricidia].Leaf.CoverGreen
          Fertiliser
          SurfaceOrganicMatter: InitialResidueName=maize_stubble; InitialResidueType=maize; InitialResidueMass=0; InitialStandingFraction=0; InitialCPR=400; InitialCNR=80; FractionFaecesAdded=1
          Plant Gliricidia: CropType=Gliricidia; IsEnding=false; DaysAfterEnding=0
          Manager TreeSowingRule
            RowSpace = 0.4083
            RowWidth = 2
            CultivarName = Gliricidia
            SowingDate = 05/15/1989 00:00:00
            script: same as in Validation.Hamakuapoko.HamakuapokoBase.Zone.TreeSowingRule
          Operations
          Operations PreExperimentOperations
            1989-05-15  [Fertiliser].Apply(Amount: 20, Type: Fertiliser.Types.NO3N)
            1989-09-15  [Fertiliser].Apply(Amount: 20, Type: Fertiliser.Types.NO3N)
            1990-01-15  [CuttingManagement].Script.DoCut(10, 40);
            1990-03-15  [CuttingManagement].Script.DoCut(40, 90);
            1990-07-15  [CuttingManagement].Script.DoCut(10, 40);
            1990-09-15  [CuttingManagement].Script.DoCut(40, 90);
            1990-12-15  [CuttingManagement].Script.DoCut(10, 40);
            1991-01-15  [CuttingManagement].Script.DoCut(10, 40);
            1991-03-15  [CuttingManagement].Script.DoCut(40, 90);
            1991-07-15  [CuttingManagement].Script.DoCut(10, 40);
            1991-09-15  [CuttingManagement].Script.DoCut(40, 90);
            1991-12-15  [CuttingManagement].Script.DoCut(10, 40);
            1992-01-15  [CuttingManagement].Script.DoCut(10, 40);
            1992-03-15  [CuttingManagement].Script.DoCut(40, 90);
            1992-07-15  [CuttingManagement].Script.DoCut(10, 40);
            1992-09-15  [CuttingManagement].Script.DoCut(40, 90);
            1992-12-15  [CuttingManagement].Script.DoCut(10, 40);
            1993-01-15  [CuttingManagement].Script.DoCut(10, 40);
            1993-03-15  [CuttingManagement].Script.DoCut(40, 90);
            1993-07-15  [CuttingManagement].Script.DoCut(10, 40);
            1993-09-15  [CuttingManagement].Script.DoCut(40, 90);
            1993-12-15  [CuttingManagement].Script.DoCut(10, 40);
            1994-01-15  [CuttingManagement].Script.DoCut(10, 40);
            1994-03-15  [CuttingManagement].Script.DoCut(40, 90);
            1994-07-15  [CuttingManagement].Script.DoCut(10, 40);
            1994-09-15  [CuttingManagement].Script.DoCut(40, 90);
            1994-12-15  [CuttingManagement].Script.DoCut(10, 40);
            1995-01-15  [CuttingManagement].Script.DoCut(10, 40);
            1995-03-15  [CuttingManagement].Script.DoCut(40, 90);
            1995-07-15  [CuttingManagement].Script.DoCut(10, 40);
            1995-09-15  [CuttingManagement].Script.DoCut(40, 90);
            1995-12-15  [CuttingManagement].Script.DoCut(10, 40);
          Manager CuttingManagement: same as Validation.Guadeloupe.GuadeloupeBase.Zone.CuttingManagement
    Experiment Makoka
      Factors
        Permutation
          Factor N: Specification=[FertiliserRule]
            Manager 0
              Amount = 0
              CropName = maize
              FertDAS = 30
```csharp
using System;
using Models.Core;
using Models.PMF;
namespace Models
{
    [Serializable]
    public class Script : Model
    {
        [Link] Clock Clock;
        [Link] Fertiliser Fertiliser;
        [Link] Summary Summary;
        [Link] Plant Maize;
        
        
        [Description("Amount of fertiliser N to be applied (kg/ha)")]
        public double Amount { get; set; }
        
        [Description("Crop to be fertilised")]
        public string CropName { get; set; }
        
        [Description("Days after sowing:")]
        public int FertDAS { get; set; }
        
        

        [EventSubscribe("DoManagement")]
        private void OnDoManagement(object sender, EventArgs e)
        {
            if (Maize.IsAlive && Maize.Phenology.DaysAfterSowing == FertDAS)
                Fertiliser.Apply(Amount: Amount, Type: Fertiliser.Types.UreaN);
                
                
        }
        
    }
}
```
            Manager 24
              Amount = 24
              CropName = maize
              FertDAS = 28
```csharp
using System;
using Models.Core;
using Models.PMF;
namespace Models
{
    [Serializable]
    public class Script : Model
    {
        [Link] Clock Clock;
        [Link] Fertiliser Fertiliser;
        [Link] Summary Summary;
        [Link] Plant Maize;
        
        
        [Description("Amount of fertiliser N to be applied (kg/ha)")]
        public double Amount { get; set; }
        
        [Description("Crop to be fertilised")]
        public string CropName { get; set; }
        
        [Description("Days after sowing:")]
        public int FertDAS { get; set; }
        
        

        [EventSubscribe("DoManagement")]
        private void OnDoManagement(object sender, EventArgs e)
        {
            if (Maize.IsAlive && Maize.Phenology.DaysAfterSowing == FertDAS)
                Fertiliser.Apply(Amount: Amount, Type: Fertiliser.Types.NH4N);
                
                
        }
        
    }
}
```
            Manager 48
              Amount = 48
              CropName = maize
              FertDAS = 28
              script: same as in Validation.Makoka.Factors.Permutation.N.24
          Factor Maize: Specification=[GliricidiaManagement]
            Operations Sole
            Operations Gliricidia
              1991-12-15  [Gliricidia].Sow(population: 0.74, cultivar: GliricidiaYoung,depth: 100, rowSpacing: 1500);
              1992-09-15  [CuttingManagement].Script.DoCut(440, 575);
              1992-12-15  [CuttingManagement].Script.DoCut(10, 25);
              1993-02-15  [CuttingManagement].Script.DoCut(10, 25);
              1993-09-15  [CuttingManagement].Script.DoCut(10, 25);
              1993-12-15  [CuttingManagement].Script.DoCut(10, 25);
              1994-02-15  [CuttingManagement].Script.DoCut(10, 25);
              1994-09-15  [CuttingManagement].Script.DoCut(10, 25);
              1994-12-15  [CuttingManagement].Script.DoCut(10, 25);
              1995-02-15  [CuttingManagement].Script.DoCut(10, 25);
              1995-09-15  [CuttingManagement].Script.DoCut(10, 25);
              1995-12-15  [CuttingManagement].Script.DoCut(10, 25);
              1996-02-15  [CuttingManagement].Script.DoCut(10, 25);
              1996-09-15  [CuttingManagement].Script.DoCut(10, 25);
              1996-12-15  [CuttingManagement].Script.DoCut(10, 25);
              1997-02-15  [CuttingManagement].Script.DoCut(10, 25);
              1997-08-15  [CuttingManagement].Script.DoCut(10, 25);
              1997-10-31  [CuttingManagement].Script.DoCut(10, 25);
              1997-12-31  [CuttingManagement].Script.DoCut(10, 25);
              1998-02-28  [CuttingManagement].Script.DoCut(10, 25);
              1998-08-31  [CuttingManagement].Script.DoCut(10, 25);
              1998-10-31  [CuttingManagement].Script.DoCut(10, 25);
              1998-12-31  [CuttingManagement].Script.DoCut(10, 25);
              1999-02-28  [CuttingManagement].Script.DoCut(10, 25);
              1999-08-31  [CuttingManagement].Script.DoCut(10, 25);
              1999-10-31  [CuttingManagement].Script.DoCut(10, 25);
              1999-12-31  [CuttingManagement].Script.DoCut(10, 25);
              2000-02-28  [CuttingManagement].Script.DoCut(10, 25);
              2000-08-31  [CuttingManagement].Script.DoCut(10, 25);
              2000-10-31  [CuttingManagement].Script.DoCut(10, 25);
              2000-12-31  [CuttingManagement].Script.DoCut(10, 25);
              2001-02-28  [CuttingManagement].Script.DoCut(10, 25);
              2001-08-31  [CuttingManagement].Script.DoCut(10, 25);
              2001-10-31  [CuttingManagement].Script.DoCut(10, 25);
              2001-12-31  [CuttingManagement].Script.DoCut(10, 25);
              2002-02-28  [CuttingManagement].Script.DoCut(10, 25);
              2002-08-31  [CuttingManagement].Script.DoCut(10, 25);
              2002-10-31  [CuttingManagement].Script.DoCut(10, 25);
              2002-12-31  [CuttingManagement].Script.DoCut(10, 25);
              2003-02-28  [CuttingManagement].Script.DoCut(10, 25);
              2003-08-18  [CuttingManagement].Script.DoCut(10, 25);
              2003-11-07  [CuttingManagement].Script.DoCut(10, 25);
              2003-12-16  [CuttingManagement].Script.DoCut(10, 25);
              2004-02-02  [CuttingManagement].Script.DoCut(10, 25);
              2004-08-18  [CuttingManagement].Script.DoCut(10, 25);
              2004-12-21  [CuttingManagement].Script.DoCut(10, 25);
              2005-01-31  [CuttingManagement].Script.DoCut(10, 25);
              2005-10-04  [CuttingManagement].Script.DoCut(10, 25);
              2005-12-05  [CuttingManagement].Script.DoCut(10, 25);
              2006-01-24  [CuttingManagement].Script.DoCut(10, 25);
              // 1993-02-15  [SurfaceOrganicMatter].Add(mass: 654, N:25.5, P:0, type:"maize", name:"maize")
              // 1993-08-15  [SurfaceOrganicMatter].Add(mass: 654, N:25.5, P:0, type:"maize", name:"maize")
              // 1993-10-15  [SurfaceOrganicMatter].Add(mass: 654, N:25.5, P:0, type:"maize", name:"maize")
              // 1993-12-15  [SurfaceOrganicMatter].Add(mass: 654, N:25.5, P:0, type:"maize", name:"maize")
              // 1994-02-15  [SurfaceOrganicMatter].Add(mass: 957, N:37.6, P:0, type:"maize", name:"maize")
              // 1994-08-15  [SurfaceOrganicMatter].Add(mass: 957, N:37.6, P:0, type:"maize", name:"maize")
              // 1994-10-15  [SurfaceOrganicMatter].Add(mass: 957, N:37.6, P:0, type:"maize", name:"maize")
              // 1994-12-15  [SurfaceOrganicMatter].Add(mass: 957, N:37.6, P:0, type:"maize", name:"maize")
              // 1995-02-15  [SurfaceOrganicMatter].Add(mass: 895, N:34.7, P:0, type:"maize", name:"maize")
              // 1995-08-15  [SurfaceOrganicMatter].Add(mass: 895, N:34.7, P:0, type:"maize", name:"maize")
              // 1995-10-15  [SurfaceOrganicMatter].Add(mass: 895, N:34.7, P:0, type:"maize", name:"maize")
              // 1995-12-15  [SurfaceOrganicMatter].Add(mass: 895, N:34.7, P:0, type:"maize", name:"maize")
              // 1996-02-15  [SurfaceOrganicMatter].Add(mass: 1179, N:45.8, P:0, type:"maize", name:"maize")
              // 1996-08-15  [SurfaceOrganicMatter].Add(mass: 1179, N:45.8, P:0, type:"maize", name:"maize")
              // 1996-10-15  [SurfaceOrganicMatter].Add(mass: 1179, N:45.8, P:0, type:"maize", name:"maize")
              // 1996-12-15  [SurfaceOrganicMatter].Add(mass: 1179, N:45.8, P:0, type:"maize", name:"maize")
              // 1997-02-15  [SurfaceOrganicMatter].Add(mass: 1414, N:55, P:0, type:"maize", name:"maize")
              // 1997-08-15  [SurfaceOrganicMatter].Add(mass: 1414, N:55, P:0, type:"maize", name:"maize")
              // 1997-10-15  [SurfaceOrganicMatter].Add(mass: 1414, N:55, P:0, type:"maize", name:"maize")
              // 1997-12-15  [SurfaceOrganicMatter].Add(mass: 1414, N:55, P:0, type:"maize", name:"maize")
              // 1998-02-15  [SurfaceOrganicMatter].Add(mass: 1698, N:66.4, P:0, type:"maize", name:"maize")
              // 1998-08-15  [SurfaceOrganicMatter].Add(mass: 1698, N:66.4, P:0, type:"maize", name:"maize")
              // 1998-10-15  [SurfaceOrganicMatter].Add(mass: 1698, N:66.4, P:0, type:"maize", name:"maize")
              // 1998-12-15  [SurfaceOrganicMatter].Add(mass: 1698, N:66.4, P:0, type:"maize", name:"maize")
              // 1999-02-15  [SurfaceOrganicMatter].Add(mass: 1414, N:54.8, P:0, type:"maize", name:"maize")
              // 1999-08-15  [SurfaceOrganicMatter].Add(mass: 1414, N:54.8, P:0, type:"maize", name:"maize")
              // 1999-10-15  [SurfaceOrganicMatter].Add(mass: 1414, N:54.8, P:0, type:"maize", name:"maize")
              // 1999-12-15  [SurfaceOrganicMatter].Add(mass: 1414, N:54.8, P:0, type:"maize", name:"maize")
              // 2000-02-15  [SurfaceOrganicMatter].Add(mass: 1068, N:40.9, P:0, type:"maize", name:"maize")
              // 2000-08-15  [SurfaceOrganicMatter].Add(mass: 1068, N:40.9, P:0, type:"maize", name:"maize")
              // 2000-10-15  [SurfaceOrganicMatter].Add(mass: 1068, N:40.9, P:0, type:"maize", name:"maize")
              // 2000-12-15  [SurfaceOrganicMatter].Add(mass: 1068, N:40.9, P:0, type:"maize", name:"maize")
              // 2001-02-15  [SurfaceOrganicMatter].Add(mass: 1389, N:54, P:0, type:"maize", name:"maize")
              // 2001-08-15  [SurfaceOrganicMatter].Add(mass: 1389, N:54, P:0, type:"maize", name:"maize")
              // 2001-10-15  [SurfaceOrganicMatter].Add(mass: 1389, N:54, P:0, type:"maize", name:"maize")
              // 2001-12-15  [SurfaceOrganicMatter].Add(mass: 1389, N:54, P:0, type:"maize", name:"maize")
              // 2002-02-15  [SurfaceOrganicMatter].Add(mass: 1216, N:46.8, P:0, type:"maize", name:"maize")
              // 2002-08-15  [SurfaceOrganicMatter].Add(mass: 1216, N:46.8, P:0, type:"maize", name:"maize")
              // 2002-10-15  [SurfaceOrganicMatter].Add(mass: 1216, N:46.8, P:0, type:"maize", name:"maize")
              // 2002-12-15  [SurfaceOrganicMatter].Add(mass: 1216, N:46.8, P:0, type:"maize", name:"maize")
              // 2003-02-15  [SurfaceOrganicMatter].Add(mass: 1228, N:48.4, P:0, type:"maize", name:"maize")
              // 2003-08-15  [SurfaceOrganicMatter].Add(mass: 1228, N:48.4, P:0, type:"maize", name:"maize")
              // 2003-10-15  [SurfaceOrganicMatter].Add(mass: 1228, N:48.4, P:0, type:"maize", name:"maize")
              // 2003-12-15  [SurfaceOrganicMatter].Add(mass: 1228, N:48.4, P:0, type:"maize", name:"maize")
              // 2004-02-15  [SurfaceOrganicMatter].Add(mass: 1228, N:48.4, P:0, type:"maize", name:"maize")
              // 2004-08-15  [SurfaceOrganicMatter].Add(mass: 1228, N:48.4, P:0, type:"maize", name:"maize")
              // 2004-10-15  [SurfaceOrganicMatter].Add(mass: 1228, N:48.4, P:0, type:"maize", name:"maize")
              // 2004-12-15  [SurfaceOrganicMatter].Add(mass: 1228, N:48.4, P:0, type:"maize", name:"maize")
              // 2005-02-15  [SurfaceOrganicMatter].Add(mass: 1228, N:48.4, P:0, type:"maize", name:"maize")
              // 2005-08-15  [SurfaceOrganicMatter].Add(mass: 1228, N:48.4, P:0, type:"maize", name:"maize")
              // 2005-10-15  [SurfaceOrganicMatter].Add(mass: 1228, N:48.4, P:0, type:"maize", name:"maize")
              // 2005-12-15  [SurfaceOrganicMatter].Add(mass: 1228, N:48.4, P:0, type:"maize", name:"maize")
              // 2001-01-15  [Maize].Sow(population: 4.44, cultivar: "NSCM_41", depth: 30, rowSpacing: 750);
              // 2001-02-07  [Fertiliser].Apply(Amount: 0, Type: Fertiliser.Types.NO3N)
      Simulation MakokaBase
        Clock: Start=1991-12-01; End=2006-12-31
        Summary SummaryFile
        Weather: FileName=Makoka.met
        SoilArbitrator Soil Arbitrator
        Zone: Area=1; Slope=0; AspectAngle=0; Altitude=50
          Soil Makoka Soil: SoilType=sand; NearestTown=Makoka; Country=Malawi; Latitude=-15.25; Longitude=37.25
            Physical
              Thickness  BD    AirDry  LL15  DUL   SAT
              200        1.42  0.05    0.08  0.36  0.46
              200        1.45  0.05    0.08  0.36  0.46
              200        1.47  0.05    0.08  0.34  0.45
              200        1.31  0.05    0.08  0.33  0.44
              200        1.42  0.05    0.08  0.33  0.44
              200        1.38  0.05    0.08  0.32  0.44
              200        1.32  0.05    0.08  0.31  0.44
              200        1.3   0.05    0.08  0.3   0.44
              200        1.31  0.05    0.08  0.3   0.44
              200        1.31  0.05    0.08  0.29  0.44
              500        1.31  0.05    0.08  0.29  0.44
              500        1.31  0.05    0.08  0.29  0.44
              SoilCrop MaizeSoil
                LL=[0.08, 0.08, 0.08, 0.08, 0.1, 0.1, 0.1, 0.1, 0.1, 0.1, 0.1, 0.1]
                KL=[0.05, 0.05, 0.05, 0.05, 0.05, 0.04, 0.03, 0.02, 0.02, 0.02, 0, 0]
                XF=[1, 1, 1, 1, 0.6, 0.6, 0, 0, 0, 0, 0, 0]
              SoilCrop GliricidiaSoil
                LL=[0.08, 0.08, 0.08, 0.08, 0.08, 0.08, 0.08, 0.08, 0.08, 0.08, 0.08, 0.08]
                KL=[0.1, 0.1, 0.1, 0.1, 0.1, 0.1, 0.1, 0.1, 0.02, 0.02, 0.02, 0.02]
                XF=[1, 1, 1, 1, 1, 1, 1, 1, 1, 0, 0, 0]
            SoilWater: SummerDate=1-Nov; SummerU=9; SummerCona=2.5; WinterDate=1-Apr; WinterU=9; WinterCona=2.5; DiffusConst=40; DiffusSlope=16; Salb=0.13; CN2Bare=65; CNRed=20; CNCov=0.8; max_pond=0; Thickness=[200, 1800, 1000]; SWCON=[0.2, 0.1, 0]; PrecipitationInterception=0
            SoilNitrogen: same as Validation.Hamakuapoko.HamakuapokoBase.Zone.Hamakuapoko Soil.SoilNitrogen
            Organic: FOMCNRatio=15
              Thickness  Carbon  SoilCNRatio  FBiom  FInert  FOM
              200        0.8     14.3         0.02   0.7     27.2762
              200        0.6     14.3         0.01   0.7     20.2067
              200        0.4     14.3         0.01   0.7     14.9695
              200        0.2     14.3         0.01   0.7     11.0897
              200        0.2     14.3         0.01   0.7     8.21543
              200        0.1     14.3         0.01   0.7     6.08614
              200        0.05    14.3         0.01   0.7     4.50872
              200        0.05    14.3         0.01   0.7     3.34014
              200        0.05    14.3         0.01   0.7     2.47444
              200        0.05    14.3         0.01   0.7     1.83311
            Chemical
              Thickness  NO3N  NH4N  PH
              200        1     0.5   5.9
              200        0.5   0.2   5.6
              200        0.2   0.2   5.8
              200        0.2   0.2   5.9
              200        0.2   0.1   6.1
              200        0.2   0.1   6.3
              200        0.1   0.1   6.2
              200        0.1   0.1   6.4
              200        0.1   0.1   6.3
              200        0.1   0.1   5.9
            Sample: Thickness=[200, 200, 200, 200, 200, 200, 200, 200, 200, 200, 1000]; SWUnits=Volumetric; OCUnits=Total; PHUnits=Water
              SW=[0.18, 0.18, 0.18, 0.2, 0.23, 0.23, 0.26, 0.26, 0.27, 0.27, 0.27]
            CERESSoilTemperature
          MicroClimate: a_interception=0; b_interception=0; c_interception=0; d_interception=0; soil_albedo=0.23; SoilHeatFluxFraction=0.4; NightInterceptionFraction=0.5; ReferenceHeight=2
          Report GliricidiaDailyReport: EventNames=[Clock].DoReport
            VariableNames:
              [Clock].Today as Date
              [Zone].Area
              [Soil].SoilWater.Es
              sum([Soil].SoilNitrogen.NO3.kgha) as TotalNO3N
              sum([Soil].SoilNitrogen.NH4.kgha) as TotalNH4N
              sum([Soil].SoilWater.SWmm[1:10]) as SW200cm
              [Soil].SoilWater.SW[2] as SW30cm
              [Soil].SoilWater.SW[3] as SW50cm
              [Soil].SoilWater.SW[4] as SW70cm
              [Soil].FInert[1] as FInert10cm
              [Soil].SoilNitrogen.OC[1] as SOC10cm
              [Soil].SoilNitrogen.OC[2] as SOC30cm
              [Soil].SoilNitrogen.OC[3] as SOC50cm
              [Soil].SoilNitrogen.OC[4] as SOC70cm
              [Soil].SoilNitrogen.OC[5] as SOC90cm
              [Soil].SoilNitrogen.OC[6] as SOC110cm
              [Soil].SoilNitrogen.OC[7] as SOC130cm
              [Soil].SoilNitrogen.OC[8] as SOC150cm
              [Soil].SoilNitrogen.NO3.kghappm[1] as NO3ppm10cm
              [Soil].SoilNitrogen.NO3.kghappm[2] as NO3ppm30cm
              [Soil].SoilNitrogen.NO3.kghappm[3] as NO3ppm50cm
              [Soil].SoilNitrogen.NO3.kgha[1] as NO3kgpha10cm
              [Soil].SoilNitrogen.NO3.kgha[2] as NO3kgpha30cm
              [Soil].SoilNitrogen.NO3.kgha[3] as NO3kgpha50cm
              [Soil].SoilNitrogen.dlt_n_min_res[1] as NNM10cm
              [MicroClimate].peta
              [MicroClimate].petr
              [Soil].SoilWater.Eo
              [Soil].FBiom[1] as FBiom10cm
              [Soil].SoilWater.SW[1] as SurfaceSW
              [SurfaceOrganicMatter].Wt
              sum([Soil].SoilNitrogen.FOMN) as FOMN
              sum([Soil].SoilNitrogen.HumicN) as HumicN
              sum([Soil].SoilNitrogen.MicrobialN) as MicrobialN
              [Soil].SoilNitrogen.MicrobialN[1] as MicrobialN1
              [Soil].SoilNitrogen.MicrobialN[2] as MicrobialN2
              [Soil].SoilNitrogen.MicrobialN[3] as MicrobialN3
              [Gliricidia].Leaf.LAI
              [Gliricidia].Leaf.Fn
              [Gliricidia].Leaf.Live.NConc
              [Gliricidia].Leaf.MaximumNConc.FixedValue
              [Gliricidia].Leaf.MinimumNConc.FixedValue
              [Gliricidia].Leaf.Fw
              [Gliricidia].Leaf.Live.Wt
              [Gliricidia].Leaf.Live.Wt
              [Gliricidia].Stem.Live.Wt
              [Gliricidia].Root.Live.Wt
              [Gliricidia].Root.TotalDMDemand
              [Gliricidia].Stem.DMDemands.Structural.DMDemandFunction.Value
              [Gliricidia].Leaf.DMDemands.Structural.DMDemandFunction.Value
              [Gliricidia].Root.PartitionFraction.Value
              [Gliricidia].AboveGround.Wt
              [Gliricidia].Leaf.CoverGreen
              [Gliricidia].Nodule.FixationRate
              [Gliricidia].Nodule.NFixed
              [Gliricidia].Stem.Live.StorageWt
              [Gliricidia].Stem.Live.StructuralWt
              [Gliricidia].Stem.Live.StorageN
              [Gliricidia].Stem.Live.StructuralN
              [Gliricidia].Leaf.Photosynthesis
              [Gliricidia].Leaf.DMDemands.Structural.DMDemandFunction
              [Gliricidia].Stem.DMDemands.Structural.DMDemandFunction
              [Gliricidia].Root.DMDemands.Structural.DMDemandFunction
          Report GlircidiaAnnualOutput: EventNames=[Clock].EndOfYear
            VariableNames:
              [Clock].Today
              [Clock].Today.Year
              [Gliricidia].Age
              [Gliricidia].LAI
              sum of [Gliricidia].Nodule.NFixed from 1-Jan to 31-Dec as AnnualNFixed
          Report MaizeDailyReport: EventNames=[Clock].DoReport
            VariableNames:
              [Clock].Today
              [Clock].Today.DayOfYear
              [Zone].Area
              [Soil].SoilWater.Es
              ([Soil].SoilNitrogen.NO3.kgha[1]+[Soil].SoilNitrogen.NH4.kgha[1]) as SurfaceMineralN
              ([Soil].SoilNitrogen.NO3.kgha[2]+[Soil].SoilNitrogen.NH4.kgha[2]) as Soil2MineralN
              ([Soil].SoilNitrogen.NO3.kgha[3]+[Soil].SoilNitrogen.NH4.kgha[3]) as Soil3MineralN
              ([Soil].SoilNitrogen.NO3.kgha[4]+[Soil].SoilNitrogen.NH4.kgha[4]) as Soil4MineralN
              ([Soil].SoilNitrogen.NO3.kgha[3]+[Soil].SoilNitrogen.NH4.kgha[3]+[Soil].SoilNitrogen.NO3.kgha[4]+[Soil].SoilNitrogen.NH4.kgha[4]+[Soil].SoilNitrogen.NO3.kgha[5]+[Soil].SoilNitrogen.NH4.kgha[5]) as SubsurfaceMineralN
              sum([Soil].SoilNitrogen.NO3.kgha) as TotalNO3N
              sum([Soil].SoilNitrogen.NH4.kgha) as TotalNH4N
              sum([Soil].SoilWater.SWmm[1:10]) as SW200cm
              [Soil].SoilWater.SW[2] as SW30cm
              [Soil].SoilWater.SW[3] as SW50cm
              [Soil].SoilWater.SW[4] as SW70cm
              [Soil].FInert[1] as FInert10cm
              [Soil].SoilNitrogen.OC[1] as SOC10cm
              [Soil].SoilNitrogen.OC[2] as SOC30cm
              [Soil].SoilNitrogen.OC[3] as SOC50cm
              [Soil].SoilNitrogen.OC[4] as SOC70cm
              [Soil].SoilNitrogen.OC[5] as SOC90cm
              [Soil].SoilNitrogen.OC[6] as SOC110cm
              [Soil].SoilNitrogen.OC[7] as SOC130cm
              [Soil].SoilNitrogen.OC[8] as SOC150cm
              [Soil].SoilNitrogen.NO3.kghappm[1] as NO3ppm10cm
              [Soil].SoilNitrogen.NO3.kghappm[2] as NO3ppm30cm
              [Soil].SoilNitrogen.NO3.kghappm[3] as NO3ppm50cm
              [Soil].SoilNitrogen.NO3.kgha[1] as NO3kgpha10cm
              [Soil].SoilNitrogen.NO3.kgha[2] as NO3kgpha30cm
              [Soil].SoilNitrogen.NO3.kgha[3] as NO3kgpha50cm
              [Soil].SoilNitrogen.dlt_n_min_res[1] as NNM10cm
              [MicroClimate].peta
              [MicroClimate].petr
              [Soil].SoilWater.Eo
              [Soil].FBiom[1] as FBiom10cm
              [Soil].SoilWater.SW[1] as SurfaceSW
              [Maize].Leaf.Fw
              [Maize].Leaf.Photosynthesis.FVPD.Value
              [Maize].Leaf.Photosynthesis.FT.Value
              [Maize].Leaf.Fn
              [Maize].Root.Depth
              [Maize].Grain.Live.Wt as GrainWt
              [SurfaceOrganicMatter].Wt
              sum([Soil].SoilNitrogen.FOMN) as FOMN
              sum([Soil].SoilNitrogen.HumicN) as HumicN
              sum([Soil].SoilNitrogen.MicrobialN) as MicrobialN
              [Soil].SoilNitrogen.MicrobialN[1] as MicrobialN1
              [Soil].SoilNitrogen.MicrobialN[2] as MicrobialN2
              [Soil].SoilNitrogen.MicrobialN[3] as MicrobialN3
              [Maize].Phenology.DaysAfterSowing
              [Maize].Phenology.Photoperiod.Value
              [Maize].Phenology.Photosensitive.Target.Value
              [Maize].Phenology.LeafAppearance.FractionComplete
              [Maize].Structure.FinalLeafNumber.Value
              [Maize].Leaf.ExpandedCohortNo
              [Soil].SoilWater.LeachNO3
              [Soil].SoilWater.FlowNO3
          Report MaizeHarvestReport: EventNames=[Maize].Harvesting
            VariableNames:
              [Clock].Today
              [Clock].Today.Year as Year
              [Zone].Area
              [Maize].SowingData.Population
              [Maize].SowingDate.DayOfYear
              [Maize].Phenology.CurrentStageName as Stage
              [Maize].Grain.Wt
              [Maize].Stem.Live.Wt
              [Maize].EarLive.Wt
              [Maize].Leaf.Live.Wt
              [Maize].Root.Live.Wt
              [Maize].Husk.Live.Wt
              [Maize].Rachis.Live.Wt
              [Maize].EarLive.N
              [Maize].Grain.Live.N
              [Maize].Stem.Live.N
              [Maize].Leaf.Live.N
              [Maize].Root.Live.N
              [Maize].Root.Depth
              [Maize].AboveGround.N
              [Maize].AboveGround.Wt
              [Maize].Total.N
              [Maize].Total.Wt
              max of [Maize].Leaf.LAI from [Maize].Sowing to [Maize].Harvesting as LAImax
              [Maize].Grain.NumberFunction
              [Maize].Grain.Size
              [Maize].Population
              [Maize].Phenology.FloweringDAS.Value as FloweringDAS
              sum([Soil].SoilNitrogen.FOMC) as FOMC
              sum([Soil].SoilNitrogen.HumicC) as HumicC
              sum([Soil].SoilNitrogen.MicrobialC) as MicrobialC
          Fertiliser
          SurfaceOrganicMatter: InitialResidueName=maize_stubble; InitialResidueType=maize; InitialResidueMass=0; InitialStandingFraction=0; InitialCPR=400; InitialCNR=60; FractionFaecesAdded=1
          Manager SowingRule
            StartDate = 12-Dec
            EndDate = 30-Jan
            MinESW = 30
            MinRain = 30
            RainDays = 10
            CultivarName = NSCM_41
            SowingDepth = 30
            RowSpacing = 750
            Population = 4.44
```csharp
using System;
using Models.Core;
using Models.PMF;
using Models.Soils;
using Models.Utilities;
using APSIM.Shared.Utilities;

namespace Models
{
    [Serializable]
    public class Script : Model
    {
        [Link] Clock Clock;
        [Link] Fertiliser Fertiliser;
        [Link] Summary Summary;
        [Link] Plant Maize;
        [Link] Soil Soil;
        Accumulator accumulatedRain;
        
        [Description("Start of sowing window (d-mmm)")]
        public string StartDate { get; set; }
        [Description("End of sowing window (d-mmm)")]
        public string EndDate { get; set; }
        [Description("Minimum extractable soil water for sowing (mm)")]
        public double MinESW { get; set; }
        [Description("Accumulated rainfall required for sowing (mm)")]
        public double MinRain { get; set; }
        [Description("Duration of rainfall accumulation (d)")]
        public int RainDays { get; set; }
        [Description("Cultivar to be sown")]
        public string CultivarName { get; set; }
        [Description("Sowing depth (mm)")]
        public double SowingDepth { get; set; }
        [Description("Row spacing (mm)")]
        public double RowSpacing { get; set; }
        [Description("Plant population (/m2)")]
        public double Population { get; set; }
        
        
        [EventSubscribe("Commencing")]
        private void OnSimulationCommencing(object sender, EventArgs e)
        {
            accumulatedRain = new Accumulator(this, "[Weather].Rain", RainDays);
        }
        

        [EventSubscribe("DoManagement")]
        private void OnDoManagement(object sender, EventArgs e)
        {
            accumulatedRain.Update();
            
            if (DateUtilities.WithinDates(StartDate, Clock.Today, EndDate) &&
                Maize.IsAlive != true &&
                MathUtilities.Sum(Soil.SoilWater.ESW) > MinESW &&
                accumulatedRain.Sum > MinRain)
            {
                Maize.Sow(population: Population, cultivar: CultivarName, depth: SowingDepth, rowSpacing: RowSpacing);    
            }
        
        }
        
    }
}
```
          Plant Maize: CropType=Maize; IsEnding=false; DaysAfterEnding=0
          Manager FertiliserRule: same as Validation.Makoka.Factors.Permutation.N.0
          Manager Harvesting
```csharp
using System;
using Models.Core;
using System.Collections.Generic;
using System.Text;
using Models.Soils;
using Models.PMF;
using Models;
using System.Xml.Serialization;
using APSIM.Shared.Utilities;

namespace Models
{
    [Serializable] 
    public class Script : Model
    {
        [Link] Plant Maize;
        [Link] Zone zone;
                    
        
        [EventSubscribe("Commencing")]
        private void OnSimulationCommencing(object sender, EventArgs e)
        {
        }
        
        [EventSubscribe("DoManagement")]
        private void OnDoManagement(object sender, EventArgs e)
        {
            if (Maize.Phenology.CurrentPhaseName == "ReadyForHarvesting")
            {
                Maize.Harvest();
                Maize.EndCrop();
            }
        }
        
        [EventSubscribe("DoManagementCalculations")]
        private void OnDoManagementCalculations(object sender, EventArgs e)
        {
            
        }
    }
}
```
          Plant Gliricidia: CropType=Gliricidia; IsEnding=false; DaysAfterEnding=0
          Operations
            2001-01-15  [Maize].Sow(population: 4.44, cultivar: "NSCM_41", depth: 30, rowSpacing: 750);
            2001-02-07  [Fertiliser].Apply(Amount: 0, Type: Fertiliser.Types.NO3N)
            2004-01-15  [Maize].Sow(population: 3.5, cultivar: "NSCM_41", depth: 30, rowSpacing: 750);
            2004-01-07  [Fertiliser].Apply(Amount: 0, Type: Fertiliser.Types.NO3N)
          Operations GliricidiaManagement
          Manager CuttingManagement: same as Validation.Guadeloupe.GuadeloupeBase.Zone.CuttingManagement
    Experiment MakokaDuguma (disabled)
      Factors
        Factor Treat: Specification=[GliricidiaManagement]
          Operations F6H100
            2003-12-15  [Gliricidia].Sow(population: 0.74, cultivar: GliricidiaYoung,depth: 100, rowSpacing: 1500);
            2004-06-15  [CuttingManagement].Script.DoCut(10, 50);
            2004-12-15  [CuttingManagement].Script.DoCut(10, 50);
            2005-06-15  [CuttingManagement].Script.DoCut(10, 50);
            2005-12-15  [CuttingManagement].Script.DoCut(10, 50);
            2006-06-15  [CuttingManagement].Script.DoCut(10, 50);
            2006-12-15  [CuttingManagement].Script.DoCut(10, 50);
          Operations F6H50
            2003-12-15  [Gliricidia].Sow(population: 0.74, cultivar: GliricidiaYoung,depth: 100, rowSpacing: 1500);
            2004-06-15  [CuttingManagement].Script.DoCut(10, 25);
            2004-12-15  [CuttingManagement].Script.DoCut(10, 25);
            2005-06-15  [CuttingManagement].Script.DoCut(10, 25);
            2005-12-15  [CuttingManagement].Script.DoCut(10, 25);
            2006-06-15  [CuttingManagement].Script.DoCut(10, 25);
            2006-12-15  [CuttingManagement].Script.DoCut(10, 25);
          Operations F6H25
            2003-12-15  [Gliricidia].Sow(population: 0.74, cultivar: GliricidiaYoung,depth: 100, rowSpacing: 1500);
            2004-06-15  [CuttingManagement].Script.DoCut(10, 13);
            2004-12-15  [CuttingManagement].Script.DoCut(10, 13);
            2005-06-15  [CuttingManagement].Script.DoCut(10, 13);
            2005-12-15  [CuttingManagement].Script.DoCut(10, 13);
            2006-06-15  [CuttingManagement].Script.DoCut(10, 13);
            2006-12-15  [CuttingManagement].Script.DoCut(10, 13);
          Operations F3H100
            2003-12-15  [Gliricidia].Sow(population: 0.74, cultivar: GliricidiaYoung,depth: 100, rowSpacing: 1500);
            2004-03-15  [CuttingManagement].Script.DoCut(10, 50);
            2004-06-15  [CuttingManagement].Script.DoCut(10, 50);
            2004-09-15  [CuttingManagement].Script.DoCut(10, 50);
            2004-12-15  [CuttingManagement].Script.DoCut(10, 50);
            2005-03-15  [CuttingManagement].Script.DoCut(10, 50);
            2005-06-15  [CuttingManagement].Script.DoCut(10, 50);
            2005-09-15  [CuttingManagement].Script.DoCut(10, 50);
            2005-12-15  [CuttingManagement].Script.DoCut(10, 50);
            2006-03-15  [CuttingManagement].Script.DoCut(10, 50);
            2006-06-15  [CuttingManagement].Script.DoCut(10, 50);
            2006-09-15  [CuttingManagement].Script.DoCut(10, 50);
            2006-12-15  [CuttingManagement].Script.DoCut(10, 50);
          Operations F3H50
            2003-12-15  [Gliricidia].Sow(population: 0.74, cultivar: GliricidiaYoung,depth: 100, rowSpacing: 1500);
            2004-03-15  [CuttingManagement].Script.DoCut(10, 25);
            2004-06-15  [CuttingManagement].Script.DoCut(10, 25);
            2004-09-15  [CuttingManagement].Script.DoCut(10, 25);
            2004-12-15  [CuttingManagement].Script.DoCut(10, 25);
            2005-03-15  [CuttingManagement].Script.DoCut(10, 25);
            2005-06-15  [CuttingManagement].Script.DoCut(10, 25);
            2005-09-15  [CuttingManagement].Script.DoCut(10, 25);
            2005-12-15  [CuttingManagement].Script.DoCut(10, 25);
            2006-03-15  [CuttingManagement].Script.DoCut(10, 25);
            2006-06-15  [CuttingManagement].Script.DoCut(10, 25);
            2006-09-15  [CuttingManagement].Script.DoCut(10, 25);
            2006-12-15  [CuttingManagement].Script.DoCut(10, 25);
          Operations F3H25
            2003-12-15  [Gliricidia].Sow(population: 0.74, cultivar: GliricidiaYoung,depth: 100, rowSpacing: 1500);
            2004-03-15  [CuttingManagement].Script.DoCut(10, 13);
            2004-06-15  [CuttingManagement].Script.DoCut(10, 13);
            2004-09-15  [CuttingManagement].Script.DoCut(10, 13);
            2004-12-15  [CuttingManagement].Script.DoCut(10, 13);
            2005-03-15  [CuttingManagement].Script.DoCut(10, 13);
            2005-06-15  [CuttingManagement].Script.DoCut(10, 13);
            2005-09-15  [CuttingManagement].Script.DoCut(10, 13);
            2005-12-15  [CuttingManagement].Script.DoCut(10, 13);
            2006-03-15  [CuttingManagement].Script.DoCut(10, 13);
            2006-06-15  [CuttingManagement].Script.DoCut(10, 13);
            2006-09-15  [CuttingManagement].Script.DoCut(10, 13);
            2006-12-15  [CuttingManagement].Script.DoCut(10, 13);
          Operations F1H100
            2003-12-15  [Gliricidia].Sow(population: 0.74, cultivar: GliricidiaYoung,depth: 100, rowSpacing: 1500);
            2004-01-15  [CuttingManagement].Script.DoCut(10, 50);
            2004-02-15  [CuttingManagement].Script.DoCut(10, 50);
            2004-03-15  [CuttingManagement].Script.DoCut(10, 50);
            2004-04-15  [CuttingManagement].Script.DoCut(10, 50);
            2004-05-15  [CuttingManagement].Script.DoCut(10, 50);
            2004-06-15  [CuttingManagement].Script.DoCut(10, 50);
            2004-07-15  [CuttingManagement].Script.DoCut(10, 50);
            2004-08-15  [CuttingManagement].Script.DoCut(10, 50);
            2004-09-15  [CuttingManagement].Script.DoCut(10, 50);
            2004-10-15  [CuttingManagement].Script.DoCut(10, 50);
            2004-11-15  [CuttingManagement].Script.DoCut(10, 50);
            2004-12-15  [CuttingManagement].Script.DoCut(10, 50);
            2005-01-15  [CuttingManagement].Script.DoCut(10, 50);
            2005-02-15  [CuttingManagement].Script.DoCut(10, 50);
            2005-03-15  [CuttingManagement].Script.DoCut(10, 50);
            2005-04-15  [CuttingManagement].Script.DoCut(10, 50);
            2005-05-15  [CuttingManagement].Script.DoCut(10, 50);
            2005-06-15  [CuttingManagement].Script.DoCut(10, 50);
            2005-07-15  [CuttingManagement].Script.DoCut(10, 50);
            2005-08-15  [CuttingManagement].Script.DoCut(10, 50);
            2005-09-15  [CuttingManagement].Script.DoCut(10, 50);
            2005-10-15  [CuttingManagement].Script.DoCut(10, 50);
            2005-11-15  [CuttingManagement].Script.DoCut(10, 50);
            2005-12-15  [CuttingManagement].Script.DoCut(10, 50);
            2006-01-15  [CuttingManagement].Script.DoCut(10, 50);
            2006-02-15  [CuttingManagement].Script.DoCut(10, 50);
            2006-03-15  [CuttingManagement].Script.DoCut(10, 50);
            2006-04-15  [CuttingManagement].Script.DoCut(10, 50);
            2006-05-15  [CuttingManagement].Script.DoCut(10, 50);
            2006-06-15  [CuttingManagement].Script.DoCut(10, 50);
            2006-07-15  [CuttingManagement].Script.DoCut(10, 50);
            2006-08-15  [CuttingManagement].Script.DoCut(10, 50);
            2006-09-15  [CuttingManagement].Script.DoCut(10, 50);
            2006-10-15  [CuttingManagement].Script.DoCut(10, 50);
            2006-11-15  [CuttingManagement].Script.DoCut(10, 50);
            2006-12-15  [CuttingManagement].Script.DoCut(10, 50);
          Operations F1H50
            2003-12-15  [Gliricidia].Sow(population: 0.74, cultivar: GliricidiaYoung,depth: 100, rowSpacing: 1500);
            2004-01-15  [CuttingManagement].Script.DoCut(10, 25);
            2004-02-15  [CuttingManagement].Script.DoCut(10, 25);
            2004-03-15  [CuttingManagement].Script.DoCut(10, 25);
            2004-04-15  [CuttingManagement].Script.DoCut(10, 25);
            2004-05-15  [CuttingManagement].Script.DoCut(10, 25);
            2004-06-15  [CuttingManagement].Script.DoCut(10, 25);
            2004-07-15  [CuttingManagement].Script.DoCut(10, 25);
            2004-08-15  [CuttingManagement].Script.DoCut(10, 25);
            2004-09-15  [CuttingManagement].Script.DoCut(10, 25);
            2004-10-15  [CuttingManagement].Script.DoCut(10, 25);
            2004-11-15  [CuttingManagement].Script.DoCut(10, 25);
            2004-12-15  [CuttingManagement].Script.DoCut(10, 25);
            2005-01-15  [CuttingManagement].Script.DoCut(10, 25);
            2005-02-15  [CuttingManagement].Script.DoCut(10, 25);
            2005-03-15  [CuttingManagement].Script.DoCut(10, 25);
            2005-04-15  [CuttingManagement].Script.DoCut(10, 25);
            2005-05-15  [CuttingManagement].Script.DoCut(10, 25);
            2005-06-15  [CuttingManagement].Script.DoCut(10, 25);
            2005-07-15  [CuttingManagement].Script.DoCut(10, 25);
            2005-08-15  [CuttingManagement].Script.DoCut(10, 25);
            2005-09-15  [CuttingManagement].Script.DoCut(10, 25);
            2005-10-15  [CuttingManagement].Script.DoCut(10, 25);
            2005-11-15  [CuttingManagement].Script.DoCut(10, 25);
            2005-12-15  [CuttingManagement].Script.DoCut(10, 25);
            2006-01-15  [CuttingManagement].Script.DoCut(10, 25);
            2006-02-15  [CuttingManagement].Script.DoCut(10, 25);
            2006-03-15  [CuttingManagement].Script.DoCut(10, 25);
            2006-04-15  [CuttingManagement].Script.DoCut(10, 25);
            2006-05-15  [CuttingManagement].Script.DoCut(10, 25);
            2006-06-15  [CuttingManagement].Script.DoCut(10, 25);
            2006-07-15  [CuttingManagement].Script.DoCut(10, 25);
            2006-08-15  [CuttingManagement].Script.DoCut(10, 25);
            2006-09-15  [CuttingManagement].Script.DoCut(10, 25);
            2006-10-15  [CuttingManagement].Script.DoCut(10, 25);
            2006-11-15  [CuttingManagement].Script.DoCut(10, 25);
            2006-12-15  [CuttingManagement].Script.DoCut(10, 25);
          Operations F1H25
            2003-12-15  [Gliricidia].Sow(population: 0.74, cultivar: GliricidiaYoung,depth: 100, rowSpacing: 1500);
            2004-01-15  [CuttingManagement].Script.DoCut(10, 13);
            2004-02-15  [CuttingManagement].Script.DoCut(10, 13);
            2004-03-15  [CuttingManagement].Script.DoCut(10, 13);
            2004-04-15  [CuttingManagement].Script.DoCut(10, 13);
            2004-05-15  [CuttingManagement].Script.DoCut(10, 13);
            2004-06-15  [CuttingManagement].Script.DoCut(10, 13);
            2004-07-15  [CuttingManagement].Script.DoCut(10, 13);
            2004-08-15  [CuttingManagement].Script.DoCut(10, 13);
            2004-09-15  [CuttingManagement].Script.DoCut(10, 13);
            2004-10-15  [CuttingManagement].Script.DoCut(10, 13);
            2004-11-15  [CuttingManagement].Script.DoCut(10, 13);
            2004-12-15  [CuttingManagement].Script.DoCut(10, 13);
            2005-01-15  [CuttingManagement].Script.DoCut(10, 13);
            2005-02-15  [CuttingManagement].Script.DoCut(10, 13);
            2005-03-15  [CuttingManagement].Script.DoCut(10, 13);
            2005-04-15  [CuttingManagement].Script.DoCut(10, 13);
            2005-05-15  [CuttingManagement].Script.DoCut(10, 13);
            2005-06-15  [CuttingManagement].Script.DoCut(10, 13);
            2005-07-15  [CuttingManagement].Script.DoCut(10, 13);
            2005-08-15  [CuttingManagement].Script.DoCut(10, 13);
            2005-09-15  [CuttingManagement].Script.DoCut(10, 13);
            2005-10-15  [CuttingManagement].Script.DoCut(10, 13);
            2005-11-15  [CuttingManagement].Script.DoCut(10, 13);
            2005-12-15  [CuttingManagement].Script.DoCut(10, 13);
            2006-01-15  [CuttingManagement].Script.DoCut(10, 13);
            2006-02-15  [CuttingManagement].Script.DoCut(10, 13);
            2006-03-15  [CuttingManagement].Script.DoCut(10, 13);
            2006-04-15  [CuttingManagement].Script.DoCut(10, 13);
            2006-05-15  [CuttingManagement].Script.DoCut(10, 13);
            2006-06-15  [CuttingManagement].Script.DoCut(10, 13);
            2006-07-15  [CuttingManagement].Script.DoCut(10, 13);
            2006-08-15  [CuttingManagement].Script.DoCut(10, 13);
            2006-09-15  [CuttingManagement].Script.DoCut(10, 13);
            2006-10-15  [CuttingManagement].Script.DoCut(10, 13);
            2006-11-15  [CuttingManagement].Script.DoCut(10, 13);
            2006-12-15  [CuttingManagement].Script.DoCut(10, 13);
      Simulation MakokaDugumaBase
        Clock: Start=1999-12-01; End=2006-12-31
        Summary SummaryFile
        Weather: FileName=Makoka met data PS161101.met
        SoilArbitrator Soil Arbitrator
        Zone: Area=1; Slope=0; AspectAngle=0; Altitude=50
          Soil Makoka Soil: SoilType=sand; NearestTown=Makoka; Country=Malawi; Latitude=-15.25; Longitude=37.25
            Physical
              Thickness  BD    AirDry  LL15  DUL   SAT
              200        1.42  0.05    0.08  0.35  0.45
              200        1.45  0.05    0.08  0.35  0.45
              200        1.47  0.05    0.08  0.33  0.44
              200        1.31  0.05    0.08  0.33  0.44
              200        1.42  0.05    0.08  0.33  0.44
              200        1.38  0.05    0.08  0.32  0.44
              200        1.32  0.05    0.08  0.31  0.44
              200        1.3   0.05    0.08  0.3   0.44
              200        1.31  0.05    0.08  0.3   0.44
              200        1.31  0.05    0.08  0.29  0.44
              500        1.31  0.05    0.08  0.29  0.44
              500        1.31  0.05    0.08  0.29  0.44
              SoilCrop MaizeSoil
                LL=[0.1, 0.1, 0.1, 0.1, 0.15, 0.15, 0.15, 0.2, 0.2, 0.2, 0.2, 0.2]
                KL=[0.08, 0.08, 0.08, 0.08, 0.06, 0.04, 0.03, 0.02, 0.02, 0.02, 0, 0]
                XF=[1, 0.9, 0.8, 0.7, 0.6, 0.6, 0, 0, 0, 0, 0, 0]
              SoilCrop GliricidiaSoil
                LL=[0.05, 0.05, 0.05, 0.05, 0.05, 0.05, 0.05, 0.05, 0.05, 0.05, 0.05, 0.05]
                KL=[0.08, 0.08, 0.08, 0.08, 0.06, 0.04, 0.03, 0.02, 0.02, 0.02, 0.02, 0.02]
                XF=[1, 1, 1, 1, 1, 1, 1, 1, 1, 0, 0, 0]
            SoilWater: SummerDate=1-Nov; SummerU=9; SummerCona=2.5; WinterDate=1-Apr; WinterU=9; WinterCona=2.5; DiffusConst=40; DiffusSlope=16; Salb=0.13; CN2Bare=65; CNRed=20; CNCov=0.8; max_pond=0; Thickness=[200, 1800, 1000]; SWCON=[0.2, 0.1, 0]; PrecipitationInterception=0
            SoilNitrogen: fom_types=[default, manure, mucuna, lablab, shemp, stable]; fract_carb=[0.2, 0.3, 0.54, 0.57, 0.45, 0]; fract_cell=[0.7, 0.3, 0.37, 0.37, 0.47, 0.1]; fract_lign=[0.1, 0.4, 0.09, 0.06, 0.08, 0.9]
              SoilNitrogenNO3 NO3
              SoilNitrogenNH4 NH4
              SoilNitrogenUrea Urea
              SoilNitrogenPlantAvailableNO3 PlantAvailableNO3
              SoilNitrogenPlantAvailableNH4 PlantAvailableNH4
            Organic: FOMCNRatio=15
              Thickness  Carbon  SoilCNRatio  FBiom  FInert  FOM
              200        0.8     14.3         0.02   0.7     27.2762
              200        0.6     14.3         0.01   0.7     20.2067
              200        0.4     14.3         0.01   0.7     14.9695
              200        0.2     14.3         0.01   0.7     11.0897
              200        0.2     14.3         0.01   0.7     8.21543
              200        0.1     14.3         0.01   0.7     6.08614
              200        0.05    14.3         0.01   0.7     4.50872
              200        0.05    14.3         0.01   0.7     3.34014
              200        0.05    14.3         0.01   0.7     2.47444
              200        0.05    14.3         0.01   0.7     1.83311
            Chemical
              Thickness  NO3N  NH4N  PH
              200        1     0.5   5.9
              200        0.5   0.2   5.6
              200        0.2   0.2   5.8
              200        0.2   0.2   5.9
              200        0.2   0.1   6.1
              200        0.2   0.1   6.3
              200        0.1   0.1   6.2
              200        0.1   0.1   6.4
              200        0.1   0.1   6.3
              200        0.1   0.1   5.9
            Sample: Thickness=[200, 200, 200, 200, 200, 200, 200, 200, 200, 200, 1000]; SWUnits=Volumetric; OCUnits=Total; PHUnits=Water
              SW=[0.18, 0.18, 0.18, 0.2, 0.23, 0.23, 0.26, 0.26, 0.27, 0.27, 0.27]
            CERESSoilTemperature
          MicroClimate: a_interception=0; b_interception=0; c_interception=0; d_interception=0; soil_albedo=0.23; SoilHeatFluxFraction=0.4; NightInterceptionFraction=0.5; ReferenceHeight=2
          Report GliricidiaDailyReport: EventNames=[Clock].DoReport
            VariableNames:
              [Clock].Today as Date
              [Zone].Area
              [Soil].SoilWater.Es
              sum([Soil].SoilNitrogen.NO3.kgha) as TotalNO3N
              sum([Soil].SoilNitrogen.NH4.kgha) as TotalNH4N
              sum([Soil].SoilWater.SWmm[1:10]) as SW200cm
              [Soil].SoilWater.SW[2] as SW30cm
              [Soil].SoilWater.SW[3] as SW50cm
              [Soil].SoilWater.SW[4] as SW70cm
              [Soil].FInert[1] as FInert10cm
              [Soil].SoilNitrogen.OC[1] as SOC10cm
              [Soil].SoilNitrogen.OC[2] as SOC30cm
              [Soil].SoilNitrogen.OC[3] as SOC50cm
              [Soil].SoilNitrogen.OC[4] as SOC70cm
              [Soil].SoilNitrogen.OC[5] as SOC90cm
              [Soil].SoilNitrogen.OC[6] as SOC110cm
              [Soil].SoilNitrogen.OC[7] as SOC130cm
              [Soil].SoilNitrogen.OC[8] as SOC150cm
              [Soil].SoilNitrogen.NO3.kghappm[1] as NO3ppm10cm
              [Soil].SoilNitrogen.NO3.kghappm[2] as NO3ppm30cm
              [Soil].SoilNitrogen.NO3.kghappm[3] as NO3ppm50cm
              [Soil].SoilNitrogen.NO3.kgha[1] as NO3kgpha10cm
              [Soil].SoilNitrogen.NO3.kgha[2] as NO3kgpha30cm
              [Soil].SoilNitrogen.NO3.kgha[3] as NO3kgpha50cm
              [Soil].SoilNitrogen.dlt_n_min_res[1] as NNM10cm
              [MicroClimate].peta
              [MicroClimate].petr
              [Soil].SoilWater.Eo
              [Soil].FBiom[1] as FBiom10cm
              [Soil].SoilWater.SW[1] as SurfaceSW
              [SurfaceOrganicMatter].Wt
              sum([Soil].SoilNitrogen.FOMN) as FOMN
              sum([Soil].SoilNitrogen.HumicN) as HumicN
              sum([Soil].SoilNitrogen.MicrobialN) as MicrobialN
              [Soil].SoilNitrogen.MicrobialN[1] as MicrobialN1
              [Soil].SoilNitrogen.MicrobialN[2] as MicrobialN2
              [Soil].SoilNitrogen.MicrobialN[3] as MicrobialN3
              [Gliricidia].Leaf.LAI
              [Gliricidia].Leaf.Fn
              [Gliricidia].Leaf.Live.NConc
              [Gliricidia].Leaf.MaximumNConc.FixedValue
              [Gliricidia].Leaf.MinimumNConc.FixedValue
              [Gliricidia].Leaf.Fw
              [Gliricidia].Leaf.Live.Wt
              [Gliricidia].Leaf.Live.Wt
              [Gliricidia].Stem.Live.Wt
              [Gliricidia].Root.Live.Wt
              [Gliricidia].Root.TotalDMDemand
              [Gliricidia].Stem.DMDemands.Structural.DMDemandFunction.Value
              [Gliricidia].Leaf.DMDemands.Structural.DMDemandFunction.Value
              [Gliricidia].Root.PartitionFraction.Value
              [Gliricidia].AboveGround.Wt
              [Gliricidia].Leaf.CoverGreen
              [Gliricidia].Nodule.FixationRate
              [Gliricidia].Nodule.NFixed
              [Gliricidia].Stem.Live.StorageWt
              [Gliricidia].Stem.Live.StructuralWt
              [Gliricidia].Stem.Live.StorageN
              [Gliricidia].Stem.Live.StructuralN
              [Gliricidia].Leaf.Photosynthesis
              [Gliricidia].Leaf.DMDemands.Structural.DMDemandFunction
              [Gliricidia].Stem.DMDemands.Structural.DMDemandFunction
              [Gliricidia].Root.DMDemands.Structural.DMDemandFunction
          Report GlircidiaAnnualOutput: EventNames=[Clock].EndOfYear
            VariableNames:
              [Clock].Today
              [Clock].Today.Year
              [Gliricidia].Age
              [Gliricidia].LAI
              sum of [Gliricidia].Nodule.NFixed from 1-Jan to 31-Dec as AnnualNFixed
          Fertiliser
          SurfaceOrganicMatter: InitialResidueName=maize_stubble; InitialResidueType=maize; InitialResidueMass=0; InitialStandingFraction=0; InitialCPR=400; InitialCNR=60; FractionFaecesAdded=1
          Plant Gliricidia: CropType=Gliricidia; IsEnding=false; DaysAfterEnding=0
          Operations
            // 2001-01-15  [Maize].Sow(population: 1, cultivar: "NSCM_41", depth: 30, rowSpacing: 750);
            // 2001-02-07  [Fertiliser].Apply(Amount: 0, Type: Fertiliser.Types.NO3N)
          Operations GliricidiaManagement
          Zone: Area=1; Slope=0; AspectAngle=0; Altitude=50
            Soil Makoka Soil: same as Validation.MakokaDuguma.MakokaDugumaBase.Zone.Makoka Soil
            MicroClimate: a_interception=0; b_interception=0; c_interception=0; d_interception=0; soil_albedo=0.23; SoilHeatFluxFraction=0.4; NightInterceptionFraction=0.5; ReferenceHeight=2
            Report GliricidiaDailyReport: same as Validation.MakokaDuguma.MakokaDugumaBase.Zone.GliricidiaDailyReport
            Report GlircidiaAnnualOutput: EventNames=[Clock].EndOfYear
              VariableNames:
                [Clock].Today
                [Clock].Today.Year
                [Gliricidia].Age
                [Gliricidia].LAI
                sum of [Gliricidia].Nodule.NFixed from 1-Jan to 31-Dec as AnnualNFixed
            Fertiliser
            SurfaceOrganicMatter: InitialResidueName=maize_stubble; InitialResidueType=maize; InitialResidueMass=0; InitialStandingFraction=0; InitialCPR=400; InitialCNR=60; FractionFaecesAdded=1
            Plant Gliricidia: CropType=Gliricidia; IsEnding=false; DaysAfterEnding=0
            Operations
              // 2001-01-15  [Maize].Sow(population: 1, cultivar: "NSCM_41", depth: 30, rowSpacing: 750);
              // 2001-02-07  [Fertiliser].Apply(Amount: 0, Type: Fertiliser.Types.NO3N)
            Operations GliricidiaManagement
          Manager CuttingManagement
            LeafRemovalWt = 0
            StemRemovalWt = 0
            TotalRemovalWt = 0
            script: same as in Validation.Guadeloupe.GuadeloupeBase.Zone.CuttingManagement
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