Simulations: Version=122
  Memo TitlePage
    # The APSIM Grapevine Model

    _ZHU, J., Brown, H.E._

    Plant and Food Research, New Zealand

    Correspondance: junqi.zhu@plantandfood.co.nz

    ##Introduction
    Grapevine is one of the most economically important fruit crops worldwide (Alston and Sambucci, 2019), and its use in wine production has played an important cultural role in many parts of the world. Grapevines are now cultivated in more than 90 countries for wine, distilled liquors, juice, table grapes, and raisin production (Fereres and FAO OIV, 2016). Because of its global economic importance, the climate diversity of the producing regions, and a large amount of studies (from genomics to production practices), grapevine has emerged as a model perennial fruit crop species.

    ##Objective
    The model presented here was built to simulate the phenology,light interception, carbon allocation and storage, and yield formation of grapevine (Vitis vinifera) as a model perennial crop.

    ##Model construction

    The APSIM Grapevine model was developed using the Plant Modelling Framework (PMF) of [brown_plant_2014]. This new framework provides a library of plant organ and process submodels that can be coupled, at runtime, to construct a model in much the same way that models can be coupled to construct a simulation. This means that dynamic composition of lower level process and organ classes (e.g. photosynthesis, leaf) into larger constructions (e.g. maize, wheat, sorghum) can be achieved by the model developer without additional coding.

    A series of development was taken to adapt the source code to simulate the perennial woody plants. The current model including the following features:

    • A row strip configuration to represent the vineyard setup.

    • An adopted strip light interception model to capture the canopy heterogeneous and to calculate the light interception by grapevine and inter-row cover crops

    • A new carbon allocation method to allocate the carbohydrate simultaneously based on sink strength as well as sink priority. The new method capture the dynamics in carbon storage in perennial organ as well.

    • An adapted phenology model which starts from endodormancy of the bud instead of emergence and reset to endodormancy by a management method (pruning) in winter to capture the perennial behaviour

    • Using bud number per vine as input in the “sowing” method (model initialization) and calculating the number of primary shoots per vine based on fraction of budburst as a function of bud number

    • An adopted strip water competition method to calculate water competition between grapevine and inter-row cover crops

    The carbon assimilation and carbon allocation needs some further fine calibrations. so the effects of carbon stress has not been added to the yield formation processes, e.g. bunch number and berry number determination. Bunch number, berry number and potential berry fresh weight were determined by weather conditions at critical periods around flowerings of the previous and current season, see details at Zhu et al., 2020 OENO one. Berry dry mass accumulation following the source-sink carbon allocation rules. For getting a reliable estimation of yield and phenology, simulations should start one season before the season in question.
  Replacements
    Plant Grapevine: PlantType=Grapevine; IsAlive=false; IsEnding=false; DaysAfterEnding=0
      Cultivar SauvignonBlanc
      Cultivar Chardonnay
        Command:
          [Phenology].EndoDormancy.Target.BaseTarget.FixedValue = 52.0647
          [Phenology].EndoDormancy.Progression.Response.Xo.FixedValue = 10.98
          [Phenology].EndoDormancy.Progression.Response.b.FixedValue = -25.5611
          [Phenology].Budding.Target.FixedValue = 906.4065
          [Phenology].Budding.Progression.Response.X = 0,0.27668,10.27668,20.27668
          [Phenology].ThermalTime.Response.MinTemp = 0.239618
          [Phenology].ThermalTime.Response.OptTemp = 27.149
          [Phenology].ThermalTime.Response.MaxTemp = 48.75
          [Phenology].Flowering.Target.FixedValue = 45.41293
          [Phenology].BerryDevelopment.Target.Base.FixedValue = 47.77695
      Cultivar Merlot
        Command:
          [Phenology].EndoDormancy.Target.BaseTarget.FixedValue = 88.74292
          [Phenology].EndoDormancy.Progression.Response.Xo.FixedValue = 15.07995
          [Phenology].EndoDormancy.Progression.Response.b.FixedValue = -1.27593
          [Phenology].Budding.Target.FixedValue = 767.6113
          [Phenology].Budding.Progression.Response.X = 0,0.353281,10.353281,20.353281
          [Phenology].ThermalTime.Response.MinTemp = 2.51
          [Phenology].ThermalTime.Response.OptTemp = 22.245
          [Phenology].ThermalTime.Response.MaxTemp = 40.316
          [Phenology].Flowering.Target.FixedValue = 42.007
          [Phenology].BerryDevelopment.Target.Base.FixedValue = 50.84
      Cultivar PinotNoir
        Command:
          [Phenology].EndoDormancy.Target.BaseTarget.FixedValue = 72.1
          [Phenology].EndoDormancy.Progression.Response.Xo.FixedValue =7.95
          [Phenology].EndoDormancy.Progression.Response.b.FixedValue = -45.3083
          [Phenology].Budding.Target.FixedValue = 627.0382
          [Phenology].Budding.Progression.Response.X = 0,0.244,10.244,20.244
          [Phenology].ThermalTime.Response.MinTemp = 1.514
          [Phenology].ThermalTime.Response.OptTemp = 26.42341
          [Phenology].ThermalTime.Response.MaxTemp = 36.87527
          [Phenology].Flowering.Target.FixedValue = 27.5666
          [Phenology].BerryDevelopment.Target.Base.FixedValue = 29.75368
      Cultivar PinotGris
        Command:
          [Phenology].EndoDormancy.Target.BaseTarget.FixedValue = 74.163
          [Phenology].EndoDormancy.Progression.Response.Xo.FixedValue = 12.53467
          [Phenology].EndoDormancy.Progression.Response.b.FixedValue = -66.5092
          [Phenology].Budding.Target.FixedValue = 519.1688
          [Phenology].Budding.Progression.Response.X = 0, 1.93454,11.93454,21.93454
          [Phenology].ThermalTime.Response.MinTemp = 1.173588
          [Phenology].ThermalTime.Response.OptTemp = 25.6193
          [Phenology].ThermalTime.Response.MaxTemp = 35.65306
          [Phenology].Flowering.Target.FixedValue = 31.13788
          [Phenology].BerryDevelopment.Target.Base.FixedValue = 32.965
      Phenology
        Memo Phenology
          The phenology model starts from endodormancy instead of emergence in annual crops.

          The phenology module goes through phases of Endodormancy, Ecodormancy, BudBurst, Flowering, FruitSet, Veraison and LeafFall. Except the LeafFall phase, which is a leaf death phase class, all other phases are parameterised using the generic phase class. The generic phase class has two main properties: target and progression. Progression defines how units were accumulated to achieve the target of the phase on daily time step. It can be defined by any function in the UI.
          The phenology module assumes the endodormancy starts when a critical photoperiod is reached. Endodormancy is defined as the period when buds are dormant due to physiological conditions, and ecodormancy is defined when buds remain dormant due to unfavourable environmental conditions (Sarvaš, 1974).

          Three budburst modelling approaches were tested based on our phenology dataset (Parker et al. 2021): 1) forcing-only approach, which only describes the ecodormancy; 2) chilling-forcing, which describes the endo- and ecodormancy in sequence; 3) chilling-forcing-overlap, which describes the endo- and ecodormancy in sequence plus the effect of chilling units on forcing accumulation through implementation of an exponential decrease function. Chilling-forcing approach was selected in the current grapevine model but users can change to different approaches in the UI. In this approach, ecodormancy is induced when the chilling requirement is satisfied, and then followed by a period with forcing temperatures calculated by growing degree day until bud burst (Chuine, 2000). A negative sigmoid function was selected for simulating the responses of chilling units to different temperatures (Eq. 1) and a growing degree day approach was used for the forcing unit (Eq. 2).
          		R_c (Ta)=1/〖1+e〗^((-((Ta-a))/b)) 					Eq. 1
          		R_f (Ta)={█(         0,■(&      Ta<Tb) @Ta-Tb,■(&  Ta≥ Tb))┤			Eq. 2
          Rc(Ta) is the rate of chilling accumulation at hourly air temperature Ta. The rate is further divided by 24 to scale to daily step. a (equal to 12.4°C) and b (-3.8) are fitted parameters. Rf(Ta) is the rate of forcing accumulation. Tb (0°C) is the fitted base temperature. In APSIM, hourly temperature is interpolated based on the method described in Goudriaan and Van Laar (1994).

          The flowering, fruit set and véraison phase was simulated using a thermal day (td) target. The thermal day unit was calculated by the Wang-Engle temperature response function (Eq. 3 to 5), which returns values from zero to one (Wang and Engel, 1998). Thermal day was used for all other time-dependent events and function as well, e.g. leaf appearance and expansion.
          f_T=(2〖(T_ -T_min)〗^α 〖(T_opt-T_min)〗^α-〖(T_ -T_min)〗^2α)/〖(T_opt-T_min)〗^2α    ■(&T_min≤T≤T_max )	    	Eq. 3
          α=ln2⁄(ln⁡[((T_max-T_min))⁄((T_opt-T_min))])					Eq. 4
          f_Tref=(2〖(T_ref-T_min)〗^α 〖(T_opt-T_min)〗^α-〖(T_ref-T_min)〗^2α)/〖(T_opt-T_min)〗^2α    ■(&T_min≤T_ref≤T_max )	Eq. 5

          The ratio between f_T  and f_Tref was returned as the final Wang-Engle thermal day unit. T is the hourly interpolated air temperature. Tmin is the minimum temperature, 4°C. Topt is the optimum temperature, 29°C. Tmax is the maximum temperature, 38°C. Tref is the reference temperature, 25°C. Hourly interpolated values were averaged to get the Wang-Engle thermal day unit for a given day. Parameters were optimized for achieving the best prediction for flowering and véraison simultaneously.

          After summer solstice, the photoperiod decreases. When photoperiod decreases to a critical value (depends on variety and was set to 13.1 h in current model based on Camargo-Alvarez et al. (2020)), the bud for the growth of the following season enter into endodormancy. However, we could not reset the whole plant phenology into endodormancy at this time, as berries are still growing. Although it would be tidy to develop two different phenological clocks, one for the bud and one for the plant in growth, we decide to work around it by resetting the plant phenology phase into endodormancy at winter pruning which was defined in the management script. The chilling accumulation between the critical photoperiod and the pruning event was captured in another function and then added to the total chill accumulation in the endodormancy phase.
        HourlyInterpolation ThermalTime: agregationMethod=0
          WangEngelTempFunction Response: MinTemp=3.961847; OptTemp=29.046383; MaxTemp=37.934329; RefTemp=25; MaximumTemperatureWeighting=0.5
          HourlySinPpAdjusted InterpolationMethod
        GenericPhase EndoDormancy: Start=Endodormancy; End=Ecodormancy
          SubtractFunction Target
            Constant BaseTarget: FixedValue=52.64; Units=hours
            VariableReference AccChillBefPrune: VariableName=[Phenology].AccChillBefPrune
          HourlyInterpolation Progression: agregationMethod=0
            HourlySinPpAdjusted InterpolationMethod
            SigmoidFunction Response
              VariableReference XValue: VariableName=[Weather].MeanT
              Constant Ymax: FixedValue=1
              Constant Xo: FixedValue=12.42
              Constant b: FixedValue=-3.865
        GenericPhase Budding: Start=Ecodormancy; End=BudBurst
          Constant Target: FixedValue=1011.25; Units=thermaltime
          HourlyInterpolation Progression: agregationMethod=0
            XYPairs Response: X=[0, 0.008, 10.008, 20.008]; Y=[0, 0, 10, 20]
            HourlySinPpAdjusted InterpolationMethod
        GenericPhase Flowering: Start=BudBurst; End=Flowering
          Constant Target: FixedValue=21.105
          VariableReference Progression: VariableName=[Phenology].ThermalTime
        GenericPhase FruitSet: Start=Flowering; End=FruitSet
          Memo
            Fruit set (or the proportion of flowers that are retained as berries) represents a change-over from the static condition of the fully developed flower to the rapidly growing condition of the young fruit (Coombe, 1962).

            In practice the criteria to define this stage is a bit blur. In current, we set the duration from 50% flowering to fruit set is 10 thermal days based on our field experience and the method for determining berry number by meteorology factors. Fruit set phase is used as the time when the berry number is determined in this model.
          Constant Target: FixedValue=10
          VariableReference Progression: VariableName=[Phenology].ThermalTime
        GenericPhase BerryDevelopment: Start=FruitSet; End=Veraison
          MultiplyFunction Target
            Constant Base: FixedValue=23.063
            LinearInterpolationFunction LAIAdjustment
              XYPairs: X=[0, 1, 2, 3, 4, 5]; Y=[1, 1, 1, 1, 1, 1]
              VariableReference XValue: VariableName=[Grapevine].Leaf.LAI
          VariableReference Progression: VariableName=[Phenology].ThermalTime
        LeafDeathPhase: Start=Veraison; End=LeafFall
          VariableReference ThermalTime: VariableName=[Phenology].ThermalTime
        GotoPhase: Start=LeafFall; End=Unused; PhaseNameToGoto=EndoDormancy
        OnEventFunction BudBurstDOY: SetEvent=BudBurst; ReSetEvent=Endodormancy
          Memo
            A function is used to provide flowering date as days after sowing(DAS).
          Constant PreEventValue: FixedValue=0
          VariableReference PostEventValue: VariableName=[Weather].DaysSinceWinterSolstice
        OnEventFunction FloweringDOY: SetEvent=Flowering
          Memo
            A function is used to provide flowering date as days after sowing(DAS).
          Constant PreEventValue: FixedValue=176
          VariableReference PostEventValue: VariableName=[Weather].DaysSinceWinterSolstice
        OnEventFunction VeraisonDOY: SetEvent=Veraison; ReSetEvent=Ecodormancy
          Memo
            A function is used to provide flowering date as days after sowing(DAS).
          Constant PreEventValue: FixedValue=0
          VariableReference PostEventValue: VariableName=[Weather].DaysSinceWinterSolstice
        OnEventFunction CurrentSeason: SetEvent=BudBurst; ReSetEvent=Endodormancy
          Memo
            A function is used to capture the year of the current season as in the south hemisphere the growing season extends to the second year.
          Constant PreEventValue: FixedValue=0
          VariableReference PostEventValue: VariableName=[Clock].Today.Year
        AccumulateFunction AccChillBefPrune: StartStageName=Veraison; EndStageName=LeafFall; ResetStageName=Flowering; FractionRemovedOnCut=0; FractionRemovedOnHarvest=0; FractionRemovedOnGraze=0; FractionRemovedOnPrune=0
          LessThanFunction
            VariableReference DAWS: VariableName=[Weather].DaysSinceWinterSolstice
            Constant PruningTime: FixedValue=341
            LessThanFunction
              Constant autumn: FixedValue=200; Units=make sure the photoperiod is decreasing
              VariableReference DAWS: VariableName=[Weather].DaysSinceWinterSolstice
              LessThanFunction
                PhotoperiodFunction: Twilight=0; DayLength=0
                Constant CriticalPhotoPeriod: FixedValue=13.14
                VariableReference ChillingUnit: VariableName=[Phenology].EndoDormancy.Progression
                Constant Zero: FixedValue=0
              Constant Zero: FixedValue=0
            Constant Zero: FixedValue=0
        Age
      Structure: CohortInitialisationStage=Ecodormancy; LeafInitialisationStage=BudBurst
        Memo Structure
          The structure module defines the bud number per vine, rate of main stem primordia initiation rate, phyllochron (thermal day interval between two successive leaf appearance, 1.823 td in this model), branching rate and branching mortality, final leaf number and canopy height.
          Phyllochron was defined by a phase look up function in combination with a linear interpolation function. The phase look up function defines when new leaf appearance will happen, which is currently defined between budburst and véraison. The linear interpolation function defines how phyllochron changes with leaf rank based on the data presented in (Greer and Weston, 2010).
          Branching rate was calculated as the product of three components: potential branching rate, the effect of leaf area per vine, and the effects of retained bud number per meter row
        HourlyInterpolation ThermalTime: agregationMethod=0
          WangEngelTempFunction Response: MinTemp=3.961847; OptTemp=29.046383; MaxTemp=37.934329; RefTemp=25; MaximumTemperatureWeighting=0.5
          HourlySinPpAdjusted InterpolationMethod
        PhaseLookupValue MainStemPrimordiaInitiationRate: Start=BudBurst; End=Veraison
          Constant: FixedValue=1.99; Units=thermal day
        PhaseLookupValue Phyllochron: Start=BudBurst; End=Veraison
          MultiplyFunction
            Constant: FixedValue=1.823
            LinearInterpolationFunction
              XYPairs: X=[1, 5, 10, 24]; Y=[0.9, 0.9, 1, 1]
              VariableReference XValue: VariableName=[Leaf].AppearedCohortNo
        Constant FinalLeafNumber: FixedValue=25; Units=number
        Constant BranchMortality: FixedValue=0
        Constant DroughtInducedBranchMortality: FixedValue=0
        Constant StemSenescenceAge: FixedValue=0
        BudNumberFunction BudNumber: SetStage=BudBurst
          MultiplyFunction FractionOfBudBurst
            SigmoidFunction BudNumberEffect
              VariableReference XValue: VariableName=[Structure].PrimaryBudNo
              Constant Ymax: FixedValue=1.4
              Constant Xo: FixedValue=100
              Constant b: FixedValue=-54.8977
            LinearInterpolationFunction CordonDiameterEffect
              XYPairs: X=[0, 12, 15]; Y=[0.1, 1, 1]
              VariableReference XValue: VariableName=[Grapevine].Cordon.CordonDiameter
        Constant BudsPerMeterRow: FixedValue=25
        AddFunction HeightModel
          Constant BaseHeight: FixedValue=1100
          MinimumFunction
            MultiplyFunction ShootLength
              LinearInterpolationFunction Height
                XYPairs: X=[0, 90, 150, 177, 335, 336, 366]; Y=[0, 0, 1300, 1700, 1700, 0, 0]
                VariableReference XValue: VariableName=[Weather].DaysSinceWinterSolstice
              LinearInterpolationFunction DensityEffect
                XYPairs: X=[0, 13.3, 20, 26.7, 33.3, 40, 60, 65]; Y=[1, 1, 0.92, 0.86, 0.8, 0.77, 0.65, 0.65]
                VariableReference XValue: VariableName=[Structure].BudsPerMeterRow.FixedValue
            Constant TrimShootHeight: FixedValue=1100
        MultiplyFunction BranchingRate
          LinearInterpolationFunction Potential_Branching_Rate
            XYPairs: X=[0, 7, 8, 13, 14, 34]; Y=[0.1, 0.15, 0.15, 0.15, 0.15, 0.1]
            VariableReference XValue: VariableName=[Structure].LeafTipsAppeared
          LinearInterpolationFunction DensityEffect
            XYPairs: X=[0, 13.3, 20, 26.7, 33.3, 40, 60, 65, 66]; Y=[2.1, 2.1, 1.5, 0.85, 0.45, 0.2, 0.1, 0, 0]
            VariableReference XValue: VariableName=[Structure].BudsPerMeterRow.FixedValue
          Constant ScaleFactor: FixedValue=0.48
          LinearInterpolationFunction
            XYPairs: X=[0, 3, 7, 10, 14]; Y=[1, 0.25, 0.04, 0.01, 0]
            VariableReference XValue: VariableName=[Leaf].LAI
      Leaf: CurrentExpandingLeaf=34; StartFractionExpanded=0.83819; FractionNextleafExpanded=0.926641; MaxCover=1; Albedo=0.25; Gsmax350=0.02; R50=200; KDead=0.03; MaximumMainStemLeafNumber=30
        zero: DeadNodesYesterday, GrowthRespiration, LAI, Depth, Width, FRGR, PotentialEP, WaterDemand, TipsAtEmergence, CohortsAtInitialisation, FractionDied
        Memo Leaf
          The grapevine model used the phytomer-based Leaf organ class. It predicted the appearance, expansion and senescence of cohorts of leaves at each position on the primary shoot and estimated how many leaves were present in each cohort based on branching rates. Branch leaves were treated the same as main-stem leaves appeared at the same time.

          The maximum area of each cohort was currently set as a function of relative node position in respect to the final leaf number. The growth duration, lag duration, senescence duration and specific minimum and maximum leaf area were parameterised based on our field experiment, see Datasets used for Model calibration and validation. For correctly modelling leaf senescence and the dynamics of leaf area, a photoperiod acceleration effect was added. The photoperiod acceleration effect included and reflected the effects of the time of harvest on leaf senescence as well, as we observed that leaves would stay green much longer if the fruit were not harvested, See Supplementary Method 1 leaf module. Other leaf properties were parameterised to ensure no nitrogen or water stress on leaf expansion in the current grapevine model as the water and nitrogen dynamic part require further calibration.

          The potential total DM demand of a leaf was calculated based upon the delta leaf area increase per day (constrained by stress) times the mean of maximum and minimum specific leaf area given in UI. The total DM demand was then divided into structural DM demand and Metabolic DM demand based on the fraction of structural DM in total leaf weight. The priority factor q for leaf structural and metabolic demand was set to a high value (1.6) as it is the immediate source of photosynthetic and has the highest priority early in the season (Buwalda, 1991; Lakso et al., 2008). Non-structural reserves were not considered in leaf current model. At leaf senescence, 50% of the total leaf DM was reallocated to other organs following the carbon allocation method, the other half was lost due to respiration to generate the energy required for the degradation and export metabolism in the face of declining photosynthesis (Keller, 2015).

          The dynamics of seasonal canopy width and canopy depth were defined in the leaf class based on our field observation.
        VariableReference ThermalTime: VariableName=[Structure].ThermalTime
        LeafCohort InitialLeaf1: Rank=1; Area=1000
          zero: NReallocationFactor, DMReallocationFactor, NRetranslocationFactor, DMRetranslocationFactor, ShadeInducedSenRate, SenescedFrac, DeltaPotentialArea, DeltaStressConstrainedArea, DeltaCarbonConstrainedArea, PotentialStructuralDMAllocation, PotentialMetabolicDMAllocation, MetabolicNReallocated, MetabolicWtReallocated, StorageNReallocated, StorageWtReallocated, MetabolicNRetranslocated, StorageNRetrasnlocated, DMRetranslocated, MetabolicNAllocation, StructuralDMAllocation, MetabolicDMAllocation, MaintenanceRespiration
        LeafCohort InitialLeaf2: Rank=2
          zero: NReallocationFactor, DMReallocationFactor, NRetranslocationFactor, DMRetranslocationFactor, ShadeInducedSenRate, SenescedFrac, DeltaPotentialArea, DeltaStressConstrainedArea, DeltaCarbonConstrainedArea, PotentialStructuralDMAllocation, PotentialMetabolicDMAllocation, MetabolicNReallocated, MetabolicWtReallocated, StorageNReallocated, StorageWtReallocated, MetabolicNRetranslocated, StorageNRetrasnlocated, DMRetranslocated, MetabolicNAllocation, StructuralDMAllocation, MetabolicDMAllocation, Area, MaintenanceRespiration
        LeafCohort InitialLeaf3: Rank=3
          zero: NReallocationFactor, DMReallocationFactor, NRetranslocationFactor, DMRetranslocationFactor, ShadeInducedSenRate, SenescedFrac, DeltaPotentialArea, DeltaStressConstrainedArea, DeltaCarbonConstrainedArea, PotentialStructuralDMAllocation, PotentialMetabolicDMAllocation, MetabolicNReallocated, MetabolicWtReallocated, StorageNReallocated, StorageWtReallocated, MetabolicNRetranslocated, StorageNRetrasnlocated, DMRetranslocated, MetabolicNAllocation, StructuralDMAllocation, MetabolicDMAllocation, Area, MaintenanceRespiration
        LeafCohortParameters CohortParameters: ExpansionStressValue=0; CellDivisionStressValue=0; DroughtInducedLagAccelerationValue=0; DroughtInducedSenAccelerationValue=0; ShadeInducedSenescenceRateValue=0; SenessingLeafRelativeSizeValue=0
          Constant DMReallocationFactor: FixedValue=0.5; Units=percentage
          Constant DMRetranslocationFactor: FixedValue=1; Units=percentage
          MultiplyFunction MaxArea
            LinearInterpolationFunction MaxArea
              XYPairs: X=[0, 0.2, 1]; Y=[12000, 25000, 25000]
              VariableReference XValue: VariableName=[Structure].RelativeNodeApperance
            Constant: FixedValue=0.5
          LinearInterpolationFunction GrowthDuration
            XYPairs: X=[0, 0.3, 0.5, 1, 1.1]; Y=[16, 14.5, 14, 14, 14]
            VariableReference XValue: VariableName=[Structure].RelativeNodeApperance
          LinearInterpolationFunction LagDuration
            XYPairs: X=[0, 0.15, 0.3, 0.4, 0.73, 1, 1.1]; Y=[40, 40, 40, 40, 40, 40, 40]
            VariableReference XValue: VariableName=[Structure].RelativeNodeApperance
          LinearInterpolationFunction SenescenceDuration
            XYPairs: X=[0, 0.2, 1]; Y=[5, 5, 5]
            VariableReference XValue: VariableName=[Structure].RelativeNodeApperance
          Constant DetachmentLagDuration: FixedValue=1; Units=thermalDay
          Constant DetachmentDuration: FixedValue=1; Units=day
          LinearInterpolationFunction SpecificLeafAreaMax
            XYPairs: X=[0, 1]; Y=[22000, 22000]
            VariableReference XValue: VariableName=[Structure].RelativeNodeApperance
          Constant SpecificLeafAreaMin: FixedValue=15000; Units=mm2/g
          Constant StructuralFraction: FixedValue=0.8; Units=percentage
          Constant MaximumNConc: FixedValue=0.12; Units=g/g
          Constant MinimumNConc: FixedValue=0.0001; Units=g/g
          Constant InitialNConc: FixedValue=0.15; Units=g/g
          Constant NReallocationFactor: FixedValue=0; Units=percentage
          Constant NRetranslocationFactor: FixedValue=0; Units=percentage
          Constant CriticalNConc: FixedValue=0.03; Units=g/g
          LinearInterpolationFunction ShadeInducedSenescenceRate
            XYPairs: X=[0, 0.5, 0.8, 1]; Y=[0, 0, 0, 0]
            VariableReference XValue: VariableName=[Leaf].CohortCurrentRankCoverAbove
          Constant StorageFraction: FixedValue=0; Units=percentage
          Constant SenessingLeafRelativeSize: FixedValue=1; Units=0-1
          Constant LeafSizeShapeParameter: FixedValue=0.01
            Units=parameter controls the logistic growth of the leaf in growth stage
          Constant CellDivisionStress: FixedValue=1; Units=0-1
          ArrayFunction LagDurationAgeMultiplier: Values=1 1 1
          ArrayFunction SenescenceDurationAgeMultiplier: Values=1 1 1
          ArrayFunction LeafSizeAgeMultiplier: Values=1 1 1 1 1 1 1 1 1 1 1 1
          Constant RemobilisationCost: FixedValue=0
          Constant CarbonConcentration: FixedValue=0.4
          Constant ExpansionStress: FixedValue=1
          LessThanFunction DroughtInducedLagAcceleration
            VariableReference DAWS: VariableName=[Weather].DaysSinceWinterSolstice
            Constant Autumn: FixedValue=250; Units=make sure the photoperiod is decreasing
            Constant One: FixedValue=1
            LinearInterpolationFunction PhotoPeriodEffect
              XYPairs: X=[9.5, 11, 12, 14]; Y=[2.2, 1.2, 1, 1]
              PhotoperiodFunction XValue: Twilight=0; DayLength=0
          LessThanFunction DroughtInducedSenAcceleration: same as Replacements.Grapevine.Leaf.CohortParameters.DroughtInducedLagAcceleration
          MultiplyFunction MaintenanceRespirationFunction
            Constant Qm: FixedValue=0.03
            ExponentialFunction: A=0; B=1; C=0.045
              SubtractFunction
                VariableReference Xvalue: VariableName=[Weather].MeanT
                Constant RefT: FixedValue=20
        RUEModel Photosynthesis
          PhaseLookup RUE
            PhaseLookupValue Vegetative: Start=BudBurst; End=Flowering
              Constant: FixedValue=0.7; Units=g/MJ
            PhaseLookupValue Reproductive: Start=Flowering; End=LeafFall
              Constant: FixedValue=0.8; Units=g/MJ
          RUECO2Function FCO2: PhotosyntheticPathway=C3
          LinearInterpolationFunction FN
            XYPairs: X=[0, 1, 1.5]; Y=[1, 1, 1]
            VariableReference XValue: VariableName=[Leaf].Fn
          WeightedTemperatureFunction FT: MaximumTemperatureWeighting=0.75
            XYPairs: X=[5, 20, 30, 45]; Y=[1, 1, 1, 0]
          LinearInterpolationFunction FVPD
            XYPairs: X=[0, 10, 50]; Y=[1, 1, 1]
            VariableReference XValue: VariableName=[Leaf].Photosynthesis.VPD
          VariableReference RadnInt: VariableName=[Leaf].RadIntTot
          Constant FW: FixedValue=1
        MinimumFunction FRGRFunction
          VariableReference RUE_FT: VariableName=[Leaf].Photosynthesis.FT
          MinimumFunction Others
            VariableReference RUE_FN: VariableName=[Leaf].Photosynthesis.FN
            VariableReference RUE_FVPD: VariableName=[Leaf].Photosynthesis.FVPD
        MultiplyFunction ExtinctionCoeff
          Constant: FixedValue=0.6
        CompositeBiomass Total: Propertys=[[Leaf].Live, [Leaf].Dead]; DMDOfStructural=0.6
        BiomassRemoval BiomassRemovalDefaults
          OrganBiomassRemovalType Harvest: FractionLiveToRemove=0; FractionDeadToRemove=0; FractionLiveToResidue=0; FractionDeadToResidue=0
          OrganBiomassRemovalType Cut: FractionLiveToRemove=0; FractionDeadToRemove=0; FractionLiveToResidue=0; FractionDeadToResidue=0
          OrganBiomassRemovalType Prune: FractionLiveToRemove=0; FractionDeadToRemove=0; FractionLiveToResidue=0; FractionDeadToResidue=0
          OrganBiomassRemovalType Graze: FractionLiveToRemove=0; FractionDeadToRemove=0; FractionLiveToResidue=0; FractionDeadToResidue=0
        Constant DMConversionEfficiency: FixedValue=0.83
        Constant RemobilisationCost: FixedValue=0
        Constant CarbonConcentration: FixedValue=0.4
        Constant StructuralFraction: FixedValue=0.8; Units=g/g
        Constant StomatalConductanceCO2Modifier: FixedValue=1
        BiomassDemand DMDemandPriorityFactors
          Constant Structural: FixedValue=1.6
          Constant Metabolic: FixedValue=1.6
          Constant Storage: FixedValue=0.01
        Constant FrostFraction: FixedValue=0
        MultiplyFunction WidthFunction
          LinearInterpolationFunction AgeFactor
            XYPairs: X=[0, 2, 10, 20]; Y=[1, 1, 1, 1]
            VariableReference XValue: VariableName=[Phenology].Age.Years
          LinearInterpolationFunction SeasonalWidthPattern
            XYPairs: X=[0, 80, 170, 335, 361]; Y=[10, 200, 470, 470, 10]
            VariableReference XValue: VariableName=[Weather].DaysSinceWinterSolstice
        LinearInterpolationFunction DepthFunction
          XYPairs: X=[0, 100, 190, 335, 336, 366]; Y=[1, 1, 1100, 1100, 1, 1]
          VariableReference XValue: VariableName=[Weather].DaysSinceWinterSolstice
      GenericOrgan Shoot: IsAboveGround=true
        Memo Shoot
          Shoot was represented by a Generic Organ class.

          The structural biomass demand of the shoot module was calculated by a delta function that takes the difference of yesterday and today’s value of a fitted biomass growth curve. The structural biomass growth curve was represented by a beta growth function (Yin et al., 2003) fitted on individual shoot weight over time and times the shoot population per square meter. Shoot population per square meter was calculated internally based on shoot number per vine and vine density.
          DMs(t)=〖SP*DM〗_max (1+ (t_e-t)/(t_e-t_m )) (t/t_e )^(t_e/(t_e-t_m ))              0≤t_m<t_e	(Eq. 8)
          DMs(t) is the DM of all shoots (g m-2) at time t from budburst. SP the shoot population per square meter. DMmax is the fitted maximum DM per shoot under four-cane pruned vines (g). t_e is the time when DMmax was reached (79.2 td), t_m is the time at maximum growth rate (43 td).

          Note the shoot dry matter including both the primary and secondary shoots. For capturing the reduction of shoot biomass under high retained bud number per meter row caused both by smaller primary shoot and less lateral shoots (Greven et al., 2014), the priority factor for shoot DM demand was set to a very low value (4e-3).

          Parameters for shoot non-structural DM demand, e.g. priority factors were set as half of the trunk and root.
        Constant NReallocationFactor: FixedValue=1; Units=percentage
        Constant NRetranslocationFactor: FixedValue=0.1; Units=percentage
        PhaseLookupValue NitrogenDemandSwitch: Start=BudBurst; End=LeafFall
          Constant: FixedValue=1
        Constant MinimumNConc: FixedValue=0; Units=g/g
        Constant MaximumNConc: FixedValue=0.0001
        BiomassRemoval BiomassRemovalDefaults: same as Replacements.Grapevine.Leaf.BiomassRemovalDefaults
        Constant DetachmentRateFunction: FixedValue=0; Units=1/d
        Constant SenescenceRate: FixedValue=0; Units=/d
        Constant DMConversionEfficiency: FixedValue=0.83; Units=0-1
        Constant DMReallocationFactor: FixedValue=1
        VariableReference CriticalNConc: VariableName=[Shoot].MinimumNConc
        Constant RemobilisationCost: FixedValue=0
        Constant CarbonConcentration: FixedValue=0.4
        BiomassDemand NDemands
          MultiplyFunction Structural
            VariableReference MinNconc: VariableName=[Shoot].minimumNconc
            VariableReference PotentialDMAllocation: VariableName=[Shoot].potentialDMAllocation.Structural
          MultiplyFunction Metabolic
            SubtractFunction MetabolicNconc
              VariableReference CritNconc: VariableName=[Shoot].criticalNConc
              VariableReference MinNconc: VariableName=[Shoot].minimumNconc
            VariableReference PotentialDMAllocation: VariableName=[Shoot].potentialDMAllocation.Structural
          StorageNDemandFunction Storage
            VariableReference NitrogenDemandSwitch: VariableName=[Shoot].nitrogenDemandSwitch
            VariableReference MaxNconc: VariableName=[Shoot].maximumNconc
        Constant DMRetranslocationFactor: FixedValue=0.04; Units=percentage
        RetranslocateNonStructural RetranslocateNitrogen
        AccumulateFunction ThermalTimeAfterBudBurst: StartStageName=BudBurst; EndStageName=LeafFall; ResetStageName=Ecodormancy; FractionRemovedOnCut=0; FractionRemovedOnHarvest=0; FractionRemovedOnGraze=0; FractionRemovedOnPrune=0
          VariableReference ThermalTime: VariableName=[Phenology].ThermalTime
        BiomassDemand InitialWt
          Constant Structural: FixedValue=0; Units=g/m^2
          Constant Metabolic: FixedValue=0
          Constant Storage: FixedValue=0
        BiomassDemand DMDemands
          DeltaFunction Structural
            MultiplyFunction Integral
              VariableReference ShootPopulation: VariableName=[Structure].MainStemPopn
              BetaGrowthFunction: tm=29; te=57
                Constant Ymax: FixedValue=30; Units=g
                VariableReference XValue: VariableName=[Shoot].ThermalTimeAfterBudBurst
          Constant Metabolic: FixedValue=0
          MaximumFunction Storage
            MultiplyFunction Storage
              SubtractFunction
                MultiplyFunction StructuralWt
                  VariableReference StructuralWt: VariableName=[Grapevine].Cordon.Live.StructuralWt
                  Constant MaxConcentration: FixedValue=0.26; Units=gStorageDM/gStructureDM
                VariableReference StorageWt: VariableName=[Grapevine].Cordon.Live.StorageWt
              BetaGrowthFunction DailySynthesis: tm=34.4; te=54
                Constant Ymax: FixedValue=0.03
                VariableReference XValue: VariableName=[Shoot].ThermalTimeAfterBudBurst
            Constant Zero: FixedValue=0
        BiomassDemand DMDemandPriorityFactors
          Constant Structural: FixedValue=0.0036
          Constant Metabolic: FixedValue=0.001
          Constant Storage: FixedValue=0.3; Units=gc/gDM
        MultiplyFunction MaintenanceRespirationFunction
          Constant Qm: FixedValue=0.01
          ExponentialFunction: A=0; B=1; C=0.05
            SubtractFunction
              VariableReference Xvalue: VariableName=[Weather].MeanT
              Constant RefT: FixedValue=20
      GenericOrgan Cordon: IsAboveGround=true
        Memo Cordon
          Cordon, Trunk and Structural root module were all represented by the Generic Organ class, which has properties of biomass status and daily biomass demand and supply. The structural DM demand of cordon and trunk (Eq. 6) were calculated by their radius (r, unit m) derived from their DM and length, daily growth rate of the radius (dr/dt, m d-1), length (l, m) and wood density (ρ, g m-3) (Cieslak et al., 2011).
          〖dStructuralDM〗_i/dt=q_(str,i) 2πrlρ dr/dt		Eq. 6
          where i was organ type. Qstr,i was the priority factor for structural DM demand for a certain organ, determined as 0.7 for all three organs see model calibration methods. Daily growth rate of the radius were calculated based on the trunk circumference measurements on the same eight hundreds vines with 14 years’ interval.
          The structural carbon demand of the structural root was calculated by the structural demand of the trunk times the structural root/trunk ratio (set to one in this model). The structural root/trunk ratio may vary between vineyards and training systems.

          The non-structural DM demand was modelled as an active competing sink (Cieslak et al., 2011), and the parameters were kept the same for those three organs. The rate of non-structural DM synthesis depended on organ size and limited by overloading.
          〖dNonStructuralDM〗_i/dt=q_(NSC,i)*k_syn*
          (C_(max,NSC)*〖StructuralDM〗_i-〖NonStructuralDM〗_i )	Eq. 7
          The equation limited carbon storage owing to non-structural DM overloading and the organ storage capacity, which was proportional to the current organ structural biomass, Cmax,NSC was the maximum non-structural DM per unit of structural DM, set as 0.26 based on our field trunk and root samples (Greven et al., 2016). qNSC was set to 0.61 throughout the growing season. ksyn was daily non-structural DM synthesis rate, which was represented by a beta growth function Eq. 8 (Yin et al., 2003) for capturing the fast recovery of carbon reserves after flowering (Greven et al., 2016; Seleznyova et al., 2018).

          Parameters were optimized based on the measured dynamics of non-structural carbon in trunk and root by Greven et al. (2016), see model calibration methods.
          k_syn=k_max (1+ (t_e-t)/(t_e-t_m )) (t/t_e )^(t_e/(t_e-t_m ))              0≤t_m<t_e	(Eq. 8)
          k_max was the maximum non-structural DM synthesis rate, 0.03 g g-1. t_e was the thermal day after budburst when kmax was reached, 54 td (around véraison). t_m was the time when maximum increase rate occurred, 34.4 td.
          For potential carbon retranslocation by those storage organs, a value of 3.7% each day (DMRetranslocationFactor) was obtained through optimization. Actual retranslocation depends on the daily carbon supply and demand differences.
          The biomass of retained cane for following season was reset by the pruning events based on input cane diameter in the UI each year for the cane-pruned vines. The biomass of trunk and fibrous root keep growing each year.
        Constant CordonDiameter: FixedValue=10; Units=mm
        Constant CordonLength: FixedValue=0.9; Units=meter
        Constant DMReallocationFactor: FixedValue=1
        Constant DMRetranslocationFactor: FixedValue=0.037; Units=percentage
        Constant NReallocationFactor: FixedValue=1; Units=percentage
        Constant NRetranslocationFactor: FixedValue=0.04; Units=percentage
        PhaseLookupValue NitrogenDemandSwitch: Start=BudBurst; End=LeafFall
          Constant: FixedValue=1
        Constant MinimumNConc: FixedValue=0; Units=g/g
        Constant MaximumNConc: FixedValue=0.0001
        BiomassRemoval BiomassRemovalDefaults: same as Replacements.Grapevine.Leaf.BiomassRemovalDefaults
        Constant DetachmentRateFunction: FixedValue=0; Units=/d
        Constant SenescenceRate: FixedValue=0; Units=/d
        Constant DMConversionEfficiency: FixedValue=0.83; Units=0-1
        VariableReference CriticalNConc: VariableName=[Cordon].MinimumNConc
        Constant RemobilisationCost: FixedValue=0
        Constant CarbonConcentration: FixedValue=0.4
        Constant CordonNumber: FixedValue=4
        BiomassDemand NDemands
          MultiplyFunction Structural
            VariableReference MinNconc: VariableName=[Cordon].minimumNconc
            VariableReference PotentialDMAllocation: VariableName=[Cordon].potentialDMAllocation.Structural
          MultiplyFunction Metabolic
            SubtractFunction MetabolicNconc
              VariableReference CritNconc: VariableName=[Cordon].criticalNConc
              VariableReference MinNconc: VariableName=[Cordon].minimumNconc
            VariableReference PotentialDMAllocation: VariableName=[Cordon].potentialDMAllocation.Structural
          StorageNDemandFunction Storage
            VariableReference NitrogenDemandSwitch: VariableName=[Cordon].nitrogenDemandSwitch
            VariableReference MaxNconc: VariableName=[Cordon].maximumNconc
        RetranslocateNonStructural RetranslocateNitrogen
        BiomassDemand InitialWt
          Constant Structural: FixedValue=77.5; Units=g/m^2
          Constant Metabolic: FixedValue=0
          Constant Storage: FixedValue=19
        BiomassDemand DMDemandPriorityFactors
          Constant Structural: FixedValue=0.700062
          Constant Metabolic: FixedValue=0.001
          Constant Storage: FixedValue=0.61; Units=gc/gDM
        MultiplyFunction MaintenanceRespirationFunction
          Constant Qm: FixedValue=0.0005
          ExponentialFunction: A=0; B=1; C=0.05
            SubtractFunction
              VariableReference Xvalue: VariableName=[Weather].MeanT
              Constant RefT: FixedValue=20
        BiomassDemand DMDemands
          Constant Metabolic: FixedValue=0
          MaximumFunction Storage: same as Replacements.Grapevine.Shoot.DMDemands.Storage
          MultiplyFunction Structural
            Constant 2: FixedValue=2
            Constant PI: FixedValue=3.1415926
            PowerFunction Radius: Exponent=0.5
              DivideFunction RadiusSquare
                VariableReference Wt: VariableName=[Cordon].Live.Wt
                VariableReference population: VariableName=[Grapevine].Population
                VariableReference CordonNumber: VariableName=[Cordon].CordonNumber
                Constant Density: FixedValue=500000; Units=g/m3
                VariableReference Length: VariableName=[Cordon].CordonLength
                Constant PI: FixedValue=3.1415926
            Constant Density: FixedValue=400000; Units=g/m3
            Constant RadiusGR: FixedValue=9e-06; Units=meter
            VariableReference Length: VariableName=[Cordon].CordonLength
            VariableReference Population: VariableName=[Grapevine].Population
            VariableReference CordonNumber: VariableName=[Cordon].CordonNumber
      GenericOrgan Trunk: IsAboveGround=true
        BiomassDemand InitialWt
          Constant Structural: FixedValue=280; Units=g/m^2
          Constant Metabolic: FixedValue=0
          Constant Storage: FixedValue=200
        Constant DMRetranslocationFactor: FixedValue=0.037
        Constant DMReallocationFactor: FixedValue=1
        Constant DMConversionEfficiency: FixedValue=0.83; Units=0-1
        Constant NReallocationFactor: FixedValue=1
        Constant NRetranslocationFactor: FixedValue=0.1
        PhaseLookupValue NitrogenDemandSwitch: Start=BudBurst; End=LeafFall
          Constant: FixedValue=1
        Constant MinimumNConc: FixedValue=0
        Constant MaximumNConc: FixedValue=0.0001
        BiomassRemoval BiomassRemovalDefaults: same as Replacements.Grapevine.Leaf.BiomassRemovalDefaults
        Constant DetachmentRateFunction: FixedValue=0; Units=/d
        Constant SenescenceRate: FixedValue=0; Units=/d
        VariableReference CriticalNConc: VariableName=[Trunk].MinimumNConc
        Constant RemobilisationCost: FixedValue=0
        Constant CarbonConcentration: FixedValue=0.4
        BiomassDemand NDemands
          MultiplyFunction Structural
            VariableReference MinNconc: VariableName=[Trunk].minimumNconc
            VariableReference PotentialDMAllocation: VariableName=[Trunk].potentialDMAllocation.Structural
          MultiplyFunction Metabolic
            SubtractFunction MetabolicNconc
              VariableReference CritNconc: VariableName=[Trunk].criticalNConc
              VariableReference MinNconc: VariableName=[Trunk].minimumNconc
            VariableReference PotentialDMAllocation: VariableName=[Trunk].potentialDMAllocation.Structural
          StorageNDemandFunction Storage
            VariableReference NitrogenDemandSwitch: VariableName=[Trunk].nitrogenDemandSwitch
            VariableReference MaxNconc: VariableName=[Trunk].maximumNconc
        RetranslocateNonStructural RetranslocateNitrogen
        Constant TrunkDiameter: FixedValue=75; Units=mm
        Constant TrunkLength: FixedValue=0.8; Units=meter
        MultiplyFunction MaintenanceRespirationFunction: same as Replacements.Grapevine.Cordon.MaintenanceRespirationFunction
        BiomassDemand DMDemandPriorityFactors
          Constant Structural: FixedValue=0.700062
          Constant Metabolic: FixedValue=0.001
          Constant Storage: FixedValue=0.61; Units=gc/gDM
        BiomassDemand DMDemands
          MaximumFunction Storage
            MultiplyFunction Storage
              SubtractFunction
                MultiplyFunction StructuralWt
                  VariableReference StructuralWt: VariableName=[Grapevine].Trunk.Live.StructuralWt
                  Constant MaxConcentration: FixedValue=0.26; Units=gStorageDM/gStructureDM
                VariableReference StorageWt: VariableName=[Grapevine].Trunk.Live.StorageWt
              BetaGrowthFunction DailySynthesis: tm=34.4; te=54
                Constant Ymax: FixedValue=0.03
                VariableReference XValue: VariableName=[Shoot].ThermalTimeAfterBudBurst
            Constant Zero: FixedValue=0
          MultiplyFunction Structural
            Constant 2: FixedValue=2
            Constant PI: FixedValue=3.1415926
            PowerFunction Radius: Exponent=0.5
              DivideFunction RadiusSquare
                VariableReference Wt: VariableName=[Trunk].Live.Wt
                VariableReference population: VariableName=[Grapevine].Population
                Constant PI: FixedValue=3.1415926
                VariableReference Length: VariableName=[Trunk].TrunkLength
                Constant Density: FixedValue=500000; Units=g/m3
            VariableReference Length: VariableName=[Trunk].TrunkLength
            Constant Density: FixedValue=500000; Units=g/m3
            Constant RadiusGR: FixedValue=8e-06; Units=meter
            VariableReference population: VariableName=[Grapevine].Population
            LinearInterpolationFunction Age
              XYPairs: X=[1, 5, 10, 20, 30, 40, 80]; Y=[1, 1, 0.9, 0.5, 0.25, 0.14, 0.02]
              VariableReference XValue: VariableName=[Phenology].Age.Years
          Constant Metabolic: FixedValue=0
      GenericOrgan Fibrousroot: IsAboveGround=false
        Memo StructuralRoot
          Note this represents the structural roots of all the plant in the population. The structural root are primarily considered as storage organs, its researves can be made available to boost plant growth in spring and/or following a defoliation.

          The structural root is separated from the mian root class because the current root class can not handle the biomass retranslocation while a generic organ can. The biomass of the structural root is expressed as gram per square meter, while the initial dry mass for the root class is expressed at per plant level.

          structural roots in grapevine are perennial. It can grow in diamention and biomass. Its structural growth rate was calculated based on the the trunk demand times structural root and trunk ratio in this model. Its storage biomass typicall decrease in spring and refill after veraison.
        BiomassDemand InitialWt
          Constant Structural: FixedValue=280; Units=g/m^2
          Constant Metabolic: FixedValue=0
          Constant Storage: FixedValue=200
        Constant DMRetranslocationFactor: FixedValue=0.037
        Constant DMReallocationFactor: FixedValue=1
        Constant DMConversionEfficiency: FixedValue=0.83; Units=0-1
        Constant NReallocationFactor: FixedValue=1
        Constant NRetranslocationFactor: FixedValue=0.1
        PhaseLookupValue NitrogenDemandSwitch: Start=BudBurst; End=LeafFall
          Constant: FixedValue=1
        Constant MinimumNConc: FixedValue=0
        Constant MaximumNConc: FixedValue=0.0001
        BiomassRemoval BiomassRemovalDefaults: same as Replacements.Grapevine.Leaf.BiomassRemovalDefaults
        Constant DetachmentRateFunction: FixedValue=0; Units=/d
        Constant SenescenceRate: FixedValue=0; Units=/d
        VariableReference CriticalNConc: VariableName=[Trunk].MinimumNConc
        Constant RemobilisationCost: FixedValue=0
        Constant CarbonConcentration: FixedValue=0.4
        BiomassDemand NDemands: same as Replacements.Grapevine.Trunk.NDemands
        RetranslocateNonStructural RetranslocateNitrogen
        BiomassDemand DMDemandPriorityFactors
          Constant Structural: FixedValue=0.700062
          Constant Metabolic: FixedValue=0.001
          Constant Storage: FixedValue=0.61; Units=gc/gDM
        MultiplyFunction MaintenanceRespirationFunction: same as Replacements.Grapevine.Cordon.MaintenanceRespirationFunction
        BiomassDemand DMDemands
          MaximumFunction Storage
            MultiplyFunction Storage
              SubtractFunction
                MultiplyFunction StructuralWt
                  VariableReference StructuralWt: VariableName=[Grapevine].Fibrousroot.Live.StructuralWt
                  Constant MaxConcentration: FixedValue=0.26; Units=gStorageDM/gStructureDM
                VariableReference StorageWt: VariableName=[Grapevine].Fibrousroot.Live.StorageWt
              BetaGrowthFunction DailySynthesis: tm=34.4; te=54
                Constant Ymax: FixedValue=0.03
                VariableReference XValue: VariableName=[Shoot].ThermalTimeAfterBudBurst
            Constant Zero: FixedValue=0
          Constant Metabolic: FixedValue=0
          MultiplyFunction Structural
            Constant 2: FixedValue=2
            Constant PI: FixedValue=3.1415926
            PowerFunction Radius: same as Replacements.Grapevine.Trunk.DMDemands.Structural.Radius
            VariableReference Length: VariableName=[Trunk].TrunkLength
            Constant Density: FixedValue=500000; Units=g/m3
            Constant RadiusGR: FixedValue=8e-06; Units=meter
            VariableReference population: VariableName=[Grapevine].Population
            Constant RootTrunkRatio: FixedValue=1
            LinearInterpolationFunction Age
              XYPairs: X=[1, 5, 10, 20, 30, 40, 80]; Y=[1, 1, 0.9, 0.5, 0.25, 0.14, 0.02]
              VariableReference XValue: VariableName=[Phenology].Age.Years
      ReproductiveOrgan Berry: GrowthRespiration=0; MaintenanceRespiration=0; RipeStage=Ripe
        Biomass Live: DMDOfStructural=0.6
        Biomass Dead: DMDOfStructural=0.6
        Memo
          The final yield was calculated by bunches per shoot, shoots per vine, berries per bunch,and berry fresh or dry weight.

          The effects of carbon status on yield compoent has not been included as it requires further calibration. Bunch number, berry number and potential berry fresh weight were determined by weather conditions at critical periods around flowerings of the previous and current season, see details at Zhu et al., 2020 OENO one. Furthermore, in the current model, carbon effects represented by total carbon supply and demand were added in the calculation of bunch number, berry number and potential berry fresh weight.

          Berry dry mass accumulation following the source-sink carbon allocation rules. Brix was calculated based on the ratio of berry dry weight to fresh weight. Total titratable acid was simulated based on thermaltime accumulation after veraison follwoing a negative exponetial curve.

          A long-term phenology and yield monitoring trial using both two-cane and four-cane trained vertically shoot positioned (VSP) Sauvignon blanc vines was established in four vineyards in Marlborough, New Zealand in 2004, and was used for calibrating the berry module. Phenology, bunch number, berry mass, yield and meteorology records were collated. A multivariable mixed linear model was used to assess the relationship between various yield components and weather conditions. The critical periods for each yield component and weather factor were optimised based on the maximum likelihood returned from the mixed linear model. The optimised critical periods of temperature for all yield components occurred mainly before 50 % flowering either in the previous season (during inflorescence initiation) and the current season, indicating the importance of the pre-flowering period on yield formation. Out of all weather factors, maximum daily temperature had the largest effect on bunch number and overall yield and strongly influenced berry number and bunch mass. Rainfall near flowering time had a negative effect on berry mass and bunch mass, but post-flowering rainfall had a strong positive effect.
        Folder MetFactors
          Memo MetFactors
            The final yield was calculated by vines per hectare, shoots per vine, bunches per shoot, flower number per bunch, berries per bunch,and mean berry weight. The effects of temperature and carbon status were or will be considered on bunches per shoot, flower number per bunch, berries per bunch,and mean berry weight.
          DivideFunction BUN_TmaxIni
            AccumulateByNumericPhase TmaxIni: StartStageName=3.5168; EndStageName=4.7841; ResetStageName=BudBurst; FractionRemovedOnCut=0; FractionRemovedOnHarvest=0; FractionRemovedOnGraze=0; FractionRemovedOnPrune=0
              VariableReference Tmax: VariableName=[Weather].MaxT
            AccumulateByNumericPhase Time: StartStageName=3.5168; EndStageName=4.7841; ResetStageName=BudBurst; FractionRemovedOnCut=0; FractionRemovedOnHarvest=0; FractionRemovedOnGraze=0; FractionRemovedOnPrune=0
              Constant Days: FixedValue=1; Units=days/day
          DivideFunction BUN_RadIni
            AccumulateByNumericPhase RadIni: StartStageName=3.7585; EndStageName=3.9206; ResetStageName=BudBurst; FractionRemovedOnCut=0; FractionRemovedOnHarvest=0; FractionRemovedOnGraze=0; FractionRemovedOnPrune=0
              VariableReference Rad: VariableName=[Weather].Radn
            AccumulateByNumericPhase Time: StartStageName=3.7585; EndStageName=3.9206; ResetStageName=BudBurst; FractionRemovedOnCut=0; FractionRemovedOnHarvest=0; FractionRemovedOnGraze=0; FractionRemovedOnPrune=0
              Constant Days: FixedValue=1; Units=days/day
          DivideFunction BUN_CarbonIni
            AccumulateByNumericPhase FDMIni: StartStageName=3.2; EndStageName=5.2; ResetStageName=BudBurst; FractionRemovedOnCut=0; FractionRemovedOnHarvest=0; FractionRemovedOnGraze=0; FractionRemovedOnPrune=0
              VariableReference FDM: VariableName=[Grapevine].Arbitrator.FDM
            AccumulateByNumericPhase Time: StartStageName=3.2; EndStageName=5.2; ResetStageName=BudBurst; FractionRemovedOnCut=0; FractionRemovedOnHarvest=0; FractionRemovedOnGraze=0; FractionRemovedOnPrune=0
              Constant Days: FixedValue=1; Units=days/day
          DivideFunction BEN_TmaxFlow
            AccumulateByNumericPhase TmaxFlow: StartStageName=3.7752; EndStageName=4.0962; ResetStageName=BudBurst; FractionRemovedOnCut=0; FractionRemovedOnHarvest=0; FractionRemovedOnGraze=0; FractionRemovedOnPrune=0
              VariableReference Tmax: VariableName=[Weather].MaxT
            AccumulateByNumericPhase Time: StartStageName=3.7752; EndStageName=4.0962; ResetStageName=BudBurst; FractionRemovedOnCut=0; FractionRemovedOnHarvest=0; FractionRemovedOnGraze=0; FractionRemovedOnPrune=0
              Constant Days: FixedValue=1; Units=days/day
          DivideFunction BEN_TminFlow
            AccumulateByNumericPhase TminFlow: StartStageName=3.8036; EndStageName=4.2517; ResetStageName=BudBurst; FractionRemovedOnCut=0; FractionRemovedOnHarvest=0; FractionRemovedOnGraze=0; FractionRemovedOnPrune=0
              VariableReference Tmin: VariableName=[Weather].MinT
            AccumulateByNumericPhase Time: StartStageName=3.8036; EndStageName=4.2517; ResetStageName=BudBurst; FractionRemovedOnCut=0; FractionRemovedOnHarvest=0; FractionRemovedOnGraze=0; FractionRemovedOnPrune=0
              Constant Days: FixedValue=1; Units=days/day
          DivideFunction BEN_TmaxIni
            AccumulateByNumericPhase TmaxIni: StartStageName=3.7336; EndStageName=5.4935; ResetStageName=BudBurst; FractionRemovedOnCut=0; FractionRemovedOnHarvest=0; FractionRemovedOnGraze=0; FractionRemovedOnPrune=0
              VariableReference Tmax: VariableName=[Weather].MaxT
            AccumulateByNumericPhase Time: StartStageName=3.7336; EndStageName=5.4935; ResetStageName=BudBurst; FractionRemovedOnCut=0; FractionRemovedOnHarvest=0; FractionRemovedOnGraze=0; FractionRemovedOnPrune=0
              Constant Days: FixedValue=1; Units=days/day
          DivideFunction BEN_RainTotFlow
            AccumulateByNumericPhase RainTotFlow: StartStageName=3.631338; EndStageName=4.526451; ResetStageName=BudBurst; FractionRemovedOnCut=0; FractionRemovedOnHarvest=0; FractionRemovedOnGraze=0; FractionRemovedOnPrune=0
              VariableReference RainTot: VariableName=[Weather].Rain
            Constant: FixedValue=1
          DivideFunction BEN_CarbonFlow
            AccumulateByNumericPhase FDMFlow: StartStageName=3.08; EndStageName=4.05; ResetStageName=BudBurst; FractionRemovedOnCut=0; FractionRemovedOnHarvest=0; FractionRemovedOnGraze=0; FractionRemovedOnPrune=0
              VariableReference FDM: VariableName=[Grapevine].Arbitrator.FDM
            AccumulateByNumericPhase Time: StartStageName=3.08; EndStageName=4.05; ResetStageName=BudBurst; FractionRemovedOnCut=0; FractionRemovedOnHarvest=0; FractionRemovedOnGraze=0; FractionRemovedOnPrune=0
              Constant Days: FixedValue=1; Units=days/day
          DivideFunction BM_TmaxFlow
            AccumulateByNumericPhase TmaxFlow: StartStageName=3.6763; EndStageName=3.9052; ResetStageName=BudBurst; FractionRemovedOnCut=0; FractionRemovedOnHarvest=0; FractionRemovedOnGraze=0; FractionRemovedOnPrune=0
              VariableReference Tmax: VariableName=[Weather].MaxT
            AccumulateByNumericPhase Time: StartStageName=3.6763; EndStageName=3.9052; ResetStageName=BudBurst; FractionRemovedOnCut=0; FractionRemovedOnHarvest=0; FractionRemovedOnGraze=0; FractionRemovedOnPrune=0
              Constant Days: FixedValue=1; Units=days/day
          DivideFunction BM_RainTotFlow
            AccumulateByNumericPhase RainTotFlow: StartStageName=3.5555; EndStageName=5; ResetStageName=BudBurst; FractionRemovedOnCut=0; FractionRemovedOnHarvest=0; FractionRemovedOnGraze=0; FractionRemovedOnPrune=0
              VariableReference RainTot: VariableName=[Weather].Rain
            Constant: FixedValue=1
          DivideFunction BM_RadFlow
            AccumulateByNumericPhase RadFlow: StartStageName=3.046; EndStageName=3.8455; ResetStageName=BudBurst; FractionRemovedOnCut=0; FractionRemovedOnHarvest=0; FractionRemovedOnGraze=0; FractionRemovedOnPrune=0
              VariableReference Rad: VariableName=[Weather].Radn
            AccumulateByNumericPhase Time: StartStageName=3.046; EndStageName=3.8455; ResetStageName=BudBurst; FractionRemovedOnCut=0; FractionRemovedOnHarvest=0; FractionRemovedOnGraze=0; FractionRemovedOnPrune=0
              Constant Days: FixedValue=1; Units=days/day
          DivideFunction BM_RainTotVer
            AccumulateByNumericPhase RainTotVer: StartStageName=5.09; EndStageName=5.5758; ResetStageName=BudBurst; FractionRemovedOnCut=0; FractionRemovedOnHarvest=0; FractionRemovedOnGraze=0; FractionRemovedOnPrune=0
              VariableReference RainTot: VariableName=[Weather].Rain
            Constant: FixedValue=1
          DivideFunction BM_CarbonFlow
            AccumulateByNumericPhase FDMFlow: StartStageName=3.32; EndStageName=4.06; ResetStageName=BudBurst; FractionRemovedOnCut=0; FractionRemovedOnHarvest=0; FractionRemovedOnGraze=0; FractionRemovedOnPrune=0
              VariableReference FDM: VariableName=[Grapevine].Arbitrator.FDM
            AccumulateByNumericPhase Time: StartStageName=3.32; EndStageName=4.06; ResetStageName=BudBurst; FractionRemovedOnCut=0; FractionRemovedOnHarvest=0; FractionRemovedOnGraze=0; FractionRemovedOnPrune=0
              Constant Days: FixedValue=1; Units=days/day
          OnEventFunction BUN_TmaxIni1: SetEvent=Ecodormancy
            Constant PreEventValue: FixedValue=21
            VariableReference PostEventValue: VariableName=[Berry].MetFactors.BUN_TmaxIni
          OnEventFunction BUN_RadIni1: SetEvent=Ecodormancy
            Constant PreEventValue: FixedValue=21
            VariableReference PostEventValue: VariableName=[Berry].MetFactors.BUN_RadIni
          OnEventFunction BUN_CarbonIni1: SetEvent=Ecodormancy
            Constant PreEventValue: FixedValue=1
            VariableReference PostEventValue: VariableName=[Berry].MetFactors.BUN_CarbonIni
          OnEventFunction BEN_TmaxIni1: SetEvent=Veraison; ReSetEvent=Flowering
            Constant PreEventValue: FixedValue=21
            VariableReference PostEventValue: VariableName=[Berry].MetFactors.BEN_TmaxIni
        Folder YieldComponent
          OnEventFunction BunchesPerShoot: SetEvent=BudBurst; ReSetEvent=Ecodormancy
            Memo
              here we use a trigger function for bunches per shoot as the value of mean bunch initiation temperature in the previous season

              Numbers were guessed based on Eltom 2013 Fig. 7.7. y=0.0981*Ta + 0.35

               Bunches per shoot is affected by the temperature and CHO during initiation, it is further affected by the CHO during bud burst. The later decided whether the potential initiated inflorescence can grow out successfully or been realized.

              For simiplicity, right now, the CHO effect during bud burst is expressed as a function of number of buds retained.
            Constant PreEventValue: FixedValue=1.7
            MinimumFunction PostEventValue
              MaximumFunction MaximumFunc
                Memo
                  Try to ignor the first year, which give TmaxIni 0
                MultiplyFunction
                  AddFunction MetFun
                    Constant: FixedValue=-0.7965
                    LessThanFunction TmaxIni
                      VariableReference XValue: VariableName=[Berry].MetFactors.BUN_TmaxIni1
                      Constant: FixedValue=10
                      Constant PreValue: FixedValue=1.6
                      LinearInterpolationFunction TmaxIni
                        XYPairs: X=[0, 1, 10, 20, 30]; Y=[0, 0.1084, 1.084, 2.168, 3.252]
                        VariableReference XValue: VariableName=[Berry].MetFactors.BUN_TmaxIni1
                    LessThanFunction RadIni
                      VariableReference XValue: VariableName=[Berry].MetFactors.BUN_RadIni1
                      Constant: FixedValue=10
                      Constant PreValue: FixedValue=0.65
                      LinearInterpolationFunction RadIni
                        XYPairs: X=[0, 1, 10, 20, 30]; Y=[0, 0.0101, 0.101, 0.202, 0.303]
                        VariableReference XValue: VariableName=[Berry].MetFactors.BUN_RadIni1
                  LessThanFunction CarbonIni
                    VariableReference XValue: VariableName=[Berry].MetFactors.BUN_CarbonIni1
                    Constant: FixedValue=0.1
                    Constant PreValue: FixedValue=1
                    LinearInterpolationFunction FDMIni
                      VariableReference XValue: VariableName=[Berry].MetFactors.BUN_CarbonIni1
                      XYPairs: X=[0, 0.5, 1, 2]; Y=[0, 0.63, 1, 1]
                Constant one: FixedValue=1
              Constant Max: FixedValue=2.1
          OnEventFunction BunchesPerVine: SetEvent=Flowering; ReSetEvent=BudBurst
            Memo
              Trigger the calculation after the determination of bunches per shoot
            Constant PreEventValue: FixedValue=50
            MaximumFunction PostEventValue
              Constant zero: FixedValue=10
              MultiplyFunction NumberFunction
                VariableReference BunchesPerShoot: VariableName=[Berry].YieldComponent.BunchesPerShoot
                DivideFunction ShootsNum
                  VariableReference StemPopulation: VariableName=[Grapevine].Structure.MainStemPopn
                  VariableReference Population: VariableName=[Grapevine].Population
          OnEventFunction BerryNum: SetEvent=FruitSet; ReSetEvent=BudBurst
            Memo
              here we use a trigger function for bunches per shoot as the value of mean flowering temperature Y0 is updating itself during the growing season, which would cause inconvience if we directly correlates the bunches per shoot and mean flowering temperature Y0.

              Numbers were guessed based on Eltom 2013 Fig. 7.7. y=0.0981*Ta + 0.35

               Bunches per shoot is affected by the temperature and CHO during initiation, it is further affected by the CHO during bud burst. The later decided whether the potential initiated inflorescence can grow out successfully or been realized.

              For simiplicity, right now, the CHO effect during bud burst is expressed as a function of number of buds retained.
            Constant PreEventValue: FixedValue=65
            MinimumFunction PostEventValue
              MaximumFunction BerryNumFun
                MultiplyFunction
                  AddFunction MetFun
                    Constant: FixedValue=-67.4
                    LinearInterpolationFunction TmaxFlow
                      VariableReference XValue: VariableName=[Berry].MetFactors.BEN_TmaxFlow
                      XYPairs: X=[0, 1, 10, 20, 30, 40]; Y=[0, 3.4217, 34.217, 68.434, 102.651, 120]
                    LinearInterpolationFunction TminFlow
                      VariableReference XValue: VariableName=[Berry].MetFactors.BEN_TminFlow
                      XYPairs: X=[0, 1, 10, 20, 30, 40]; Y=[0, 2.4697, 24.697, 49.394, 74.091, 80]
                    LinearInterpolationFunction TmaxIni
                      XYPairs: X=[0, 1, 10, 20, 30, 40]; Y=[0, 1.3927, 13.927, 27.854, 41.781, 48]
                      LessThanFunction XValue
                        VariableReference XValue: VariableName=[Berry].MetFactors.BEN_TmaxIni1
                        Constant: FixedValue=10
                        Constant GuessValue: FixedValue=20
                        VariableReference TmaxIni1: VariableName=[Berry].MetFactors.BEN_TmaxIni1
                  LinearInterpolationFunction FDMFlow
                    VariableReference XValue: VariableName=[Berry].MetFactors.BEN_CarbonFlow
                    XYPairs: X=[0, 0.5, 0.8, 1.5]; Y=[0, 0.4, 0.9, 1.02]
                Constant zero: FixedValue=30
              Constant UpperLimit: FixedValue=150
          OnEventFunction BerryMass: SetEvent=Veraison; ReSetEvent=BudBurst
            Memo: same as Replacements.Grapevine.Berry.YieldComponent.BerryNum.Memo
            Constant PreEventValue: FixedValue=2.1
            MinimumFunction PostEventValue
              MaximumFunction BerryMassFun
                Constant LowerLimit: FixedValue=1
                MultiplyFunction
                  AddFunction MetFun
                    Constant: FixedValue=0.92369
                    LinearInterpolationFunction TmaxFlow
                      VariableReference XValue: VariableName=[Berry].MetFactors.BM_TmaxFlow
                      XYPairs: X=[0, 1, 10, 30]; Y=[0, 0.0327134, 0.327134, 0.981402]
                    LinearInterpolationFunction RadFlow
                      XYPairs: X=[0, 1, 10, 30]; Y=[0, 0.0212212, 0.212212, 0.636636]
                      VariableReference XValue: VariableName=[Berry].MetFactors.BM_RadFlow
                    LinearInterpolationFunction RainTotFlow
                      XYPairs: X=[0, 1, 100]; Y=[0, -0.0010101, -0.10101]
                      VariableReference XValue: VariableName=[Berry].MetFactors.BM_RainTotFlow
                    LinearInterpolationFunction RainTotVer
                      VariableReference XValue: VariableName=[Berry].MetFactors.BM_RainTotVer
                      XYPairs: X=[0, 1, 100]; Y=[0, 0.0010051, 0.10051]
                  LinearInterpolationFunction FDMFlow
                    VariableReference XValue: VariableName=[Berry].MetFactors.BM_CarbonFlow
                    XYPairs: X=[0, 0.5, 0.8, 1.5]; Y=[0, 0.52, 1, 1]
              Constant UpperLimit: FixedValue=3
        MultiplyFunction NumberFunction
          VariableReference StemPopulation: VariableName=[Grapevine].Structure.MainStemPopn
          VariableReference BunchesPerShoot: VariableName=[Berry].YieldComponent.BunchesPerShoot
          VariableReference BerriesPerBunch: VariableName=[Berry].YieldComponent.BerryNum
        MultiplyFunction SingleBerryFW
          BetaGrowthFunction: tm=33.3; te=59.3
            VariableReference XValue: VariableName=[Berry].ThermalTimeAfterFlowering
            VariableReference Ymax: VariableName=[Berry].YieldComponent.BerryMass
        MultiplyFunction TotalBerryFW
          VariableReference BerryNumber: VariableName=[Berry].NumberFunction
          VariableReference BerryFW: VariableName=[Berry].SingleBerryFW
        SubtractFunction WaterContent
          Constant: FixedValue=1
          PhaseLookupValue AfterFlowering: Start=Flowering; End=LeafFall
            MinimumFunction
              DivideFunction
                VariableReference BerryDW: VariableName=[Berry].Live.Wt
                VariableReference TotalBerryFW: VariableName=[Berry].TotalBerryFW
              Constant: FixedValue=0.88
        DivideFunction YieldPerVine
          VariableReference TotalBerryFW: VariableName=[Berry].TotalBerryFW
          VariableReference Population: VariableName=[Grapevine].Population
          Constant: FixedValue=1000
        PhaseLookup Brix
          PhaseLookupValue BeforeVeraison: Start=Flowering; End=Veraison
            Constant: FixedValue=5
          PhaseLookupValue AfterVeraison: Start=Veraison; End=LeafFall
            LessThanFunction
              VariableReference DAWS: VariableName=[Weather].DaysSinceWinterSolstice
              Constant: FixedValue=308
              MaximumFunction
                DivideFunction
                  MaximumFunction
                    SubtractFunction
                      Constant: FixedValue=0.944
                      VariableReference WaterContent: VariableName=[Berry].WaterContent
                    Constant zero: FixedValue=0
                  Constant: FixedValue=0.0082
                Constant min: FixedValue=5
              Constant Zero: FixedValue=5
        PhaseLookup TitratableAcid
          PhaseLookupValue BeforeVeraison: Start=Flowering; End=Veraison
            Constant: FixedValue=0
          PhaseLookupValue AfterVeraison: Start=Veraison; End=LeafFall
            ExponentialFunction TitratableAcid: A=7.866; B=30.345; C=-0.0923
              VariableReference XValue: VariableName=[Berry].ThermalTimeAfterVeraison
        AccumulateFunction ThermalTimeAfterVeraison: StartStageName=Veraison; EndStageName=LeafFall; ResetStageName=Ecodormancy; FractionRemovedOnCut=0; FractionRemovedOnHarvest=0; FractionRemovedOnGraze=0; FractionRemovedOnPrune=0
          VariableReference ThermalTime: VariableName=[Phenology].ThermalTime
        AccumulateFunction ThermalTimeAfterFlowering: StartStageName=Flowering; EndStageName=LeafFall; ResetStageName=Ecodormancy; FractionRemovedOnCut=0; FractionRemovedOnHarvest=0; FractionRemovedOnGraze=0; FractionRemovedOnPrune=0
          VariableReference ThermalTime: VariableName=[Phenology].ThermalTime
        Constant MaxNConcDailyGrowth: FixedValue=0.01; Units=g/g
        Constant NFillingRate: FixedValue=0
        Constant MinimumNConc: FixedValue=0
        Constant MaximumNConc: FixedValue=0.0001
        BiomassRemoval BiomassRemovalDefaults
          OrganBiomassRemovalType Harvest: FractionLiveToRemove=0; FractionDeadToRemove=0; FractionLiveToResidue=0; FractionDeadToResidue=0
          OrganBiomassRemovalType Cut: FractionLiveToRemove=0; FractionDeadToRemove=0; FractionLiveToResidue=0; FractionDeadToResidue=0
          OrganBiomassRemovalType Prune: FractionLiveToRemove=0; FractionDeadToRemove=0; FractionLiveToResidue=0; FractionDeadToResidue=0
          OrganBiomassRemovalType Graze: FractionLiveToRemove=0; FractionDeadToRemove=0; FractionLiveToResidue=0; FractionDeadToResidue=0
          OrganBiomassRemovalType Thin: FractionLiveToRemove=0; FractionDeadToRemove=0; FractionLiveToResidue=0; FractionDeadToResidue=0
        Constant MaximumPotentialGrainSize: FixedValue=2.5; Units=g fresh or dry
        Constant DMConversionEfficiency: FixedValue=0.98
        Constant RemobilisationCost: FixedValue=0
        Constant CarbonConcentration: FixedValue=0.4
        BiomassDemand DMDemandPriorityFactors
          Constant Structural: FixedValue=1.07758
          Constant Metabolic: FixedValue=0.001
          Constant Storage: FixedValue=0.001
        MultiplyFunction MaintenanceRespirationFunction
          Constant Qm: FixedValue=0.001
          ExponentialFunction: A=0; B=1; C=0.05
            SubtractFunction
              VariableReference Xvalue: VariableName=[Weather].MeanT
              Constant RefT: FixedValue=20
        MultiplyFunction DMDemandFunction
          LessThanFunction
            VariableReference DAWS: VariableName=[Weather].DaysSinceWinterSolstice
            Constant HarvestTime: FixedValue=305
            PhaseLookupValue AfterFruitSet: Start=Flowering; End=LeafFall
              MaximumFunction
                DeltaFunction
                  MultiplyFunction Integral
                    VariableReference BerryNumber: VariableName=[Berry].NumberFunction
                    VariableReference BerryWt: VariableName=[Berry].SingleBerryDW
                Constant: FixedValue=0; Units=g
            Constant Zero: FixedValue=0
          Constant: FixedValue=1; Units=g
        MultiplyFunction SingleBerryDW
          BetaGrowthFunction: tm=49.9; te=70
            Constant Ymax: FixedValue=0.55; Units=g
            VariableReference XValue: VariableName=[Berry].ThermalTimeAfterFlowering
      Root: GrowthRespiration=0; MaintenanceRespiration=0
        Memo Description
          Note that this organs is parameterised to represents all the fine roots of the plant.  The root organ is reponsible for uptake but can also supply both N and DM from its non-structural biomass.  The Fibrous root organ is used for simulating biomass storage and remobilisation because the current root class can not handle the biomass retranslocation.

          The dynamics of root biomass was based on the root length dynamics measurement done on mature concord vines in UC Davis by comos et al., 2005. both root growth rate and mortality rate have annual cycles.Maintenance was set to zero as it was parameterized insided the senescence rate.
          the maximum root biomass during the season is around 60 g per plant, estimated by lakso et al., 2008.

          the initial weight of the root was increased as we start the simulation in February with no leaves.the start of simulation in February was for correctly simulating the budburst in the first year. the initial weight was given to ensure that the peak of the biomass can cycle around 30 g/m2.
        BiomassDemand InitialWt
          Constant Structural: FixedValue=100; Units=g/plant
          Constant Metabolic: FixedValue=0
          Constant Storage: FixedValue=0
        BiomassDemand DMDemands
          MultiplyFunction Structural
            VariableReference wt: VariableName=[Root].Live.StructuralWt
            LinearInterpolationFunction GrowthRate
              XYPairs: X=[0, 61, 122, 153, 192, 275, 310, 366]; Y=[0, 0, 0.0030125, 0.013545, 0.02102184, 0.0035542, 0, 0]
              VariableReference XValue: VariableName=[Weather].DaysSinceWinterSolstice
            Constant GrowthCostScale: FixedValue=1.3
          Constant Metabolic: FixedValue=0
          Constant Storage: FixedValue=0
        LinearInterpolationFunction SenescenceRate
          XYPairs
            X=[0, 61, 122, 153, 192, 275, 310, 366]
            Y=[0.001484, 0.001484, 0.001973, 0.005178, 0.01264, 0.013, 0.003, 0.001484]
          VariableReference XValue: VariableName=[Weather].DaysSinceWinterSolstice
        Constant DMConversionEfficiency: FixedValue=0.83
        RootShapeCylindre RootShape
        Constant DMRetranslocationFactor: FixedValue=0
        Constant DMReallocationFactor: FixedValue=0
        PhaseLookupValue NitrogenDemandSwitch: Start=BudBurst; End=LeafFall
          Constant: FixedValue=1
        Constant MinimumNConc: FixedValue=0; Units=g/g
        Constant MaximumNConc: FixedValue=0.0001; Units=g/g
        Constant MaximumRootDepth: FixedValue=1000000; Units=mm
        BiomassRemoval BiomassRemovalDefaults: same as Replacements.Grapevine.Leaf.BiomassRemovalDefaults
        Constant RemobilisationCost: FixedValue=0
        LinearInterpolationFunction NUptakeSWFactor
          XYPairs: X=[0, 1]; Y=[0, 1]
          VariableReference XValue: VariableName=[Root].RWC
        Constant SpecificRootLength: FixedValue=500; Units=m/g
        Constant RootFrontVelocity: FixedValue=20; Units=mm/d
        Constant KNO3: FixedValue=0.02
        Constant KNH4: FixedValue=0.003
        Constant MaxDailyNUptake: FixedValue=6
        Constant CarbonConcentration: FixedValue=0.4
        BiomassDemand NDemands
          MultiplyFunction Structural
            VariableReference MinNconc: VariableName=[Root].minimumNconc
            VariableReference PotentialDMAllocation: VariableName=[Root].potentialDMAllocation.Structural
          MultiplyFunction Metabolic
            SubtractFunction MetabolicNconc
              VariableReference CritNconc: VariableName=[Root].criticalNConc
              VariableReference MinNconc: VariableName=[Root].minimumNconc
            VariableReference PotentialDMAllocation: VariableName=[Root].potentialDMAllocation.Structural
          StorageNDemandFunction Storage
            VariableReference NitrogenDemandSwitch: VariableName=[Root].nitrogenDemandSwitch
            VariableReference MaxNconc: VariableName=[Root].maximumNconc
        VariableReference CriticalNConc: VariableName=[Root].MinimumNConc
        LinearInterpolationFunction KLModifier
          XYPairs
            X=[0, 300, 600, 900, 1200, 1500, 1800, 2100, 2400, 2700, 3000]
            Y=[1, 1, 1, 1, 1, 1, 1, 1, 1, 1, 1]
          Memo Description
            This is important in SLURP as it is set for each species to represent their differences in rooting patterns between crop species
          VariableReference XValue: VariableName=[Root].LayerMidPointDepth
        Constant RootDepthStressFactor: FixedValue=1
        BiomassDemand DMDemandPriorityFactors
          Constant Structural: FixedValue=1.6
          Constant Metabolic: FixedValue=0
          Constant Storage: FixedValue=0
        MultiplyFunction MaintenanceRespirationFunction: same as Replacements.Grapevine.Shoot.MaintenanceRespirationFunction
      Constant MortalityRate: FixedValue=0
      OrganArbitrator Arbitrator
        BiomassTypeArbitrator DMArbitration
          Folder PotentialPartitioningMethods
            ReallocationMethod
            AllocateFixationMethod
            RetranslocationMethod
            SendPotentialDMAllocationsMethod
          Folder AllocationMethods
            NutrientConstrainedAllocationMethod
            DryMatterAllocationsMethod
          QPrioritythenRelativeAllocation ArbitrationMethod
        BiomassTypeArbitrator NArbitration
          Folder PotentialPartitioningMethods
            ReallocationMethod
          Folder ActualPartitioningMethods
            AllocateFixationMethod
            RetranslocationMethod
          Folder AllocationMethods
            NitrogenAllocationsMethod
          RelativeAllocation ArbitrationMethod
          AllocateUptakesMethod
        WaterUptakeMethod
        NitrogenUptakeMethod
    Report: EventNames=[Clock].DoReport
      VariableNames:
        [Clock].Today
        [Clock].Today.Year
        [Clock].Today.DayOfYear
        [Weather].DaysSinceWinterSolstice   as DAWS
        [PlantVariables].Script.Height 		as height
        [PlantVariables].Script.LAI         as LAIStrip
        [PlantVariables].Script.FRadInt     as f.rad.int
        [PlantVariables].Script.ET          as transpiration
        [PlantVariables].Script.ES          as Es
        [PlantVariables].Script.PET         as PET
        [PlantVariables].Script.RootDepth   as rootDepth
        [Soil].OutputLayers.SW
        sum([Soil].OutputLayers.SWmm)       as psw
        [Weather].Rain
        [Irrigation].IrrigationApplied
        [Soil].SoilWater.Drainage
        [Grapevine].Phenology.CurrentSeason as CurrentSeason
        [Grapevine].Phenology.Stage
        [Grapevine].Phenology.AccumulatedEmergedTT
        [Grapevine].Phenology.BudBurstDOY      as BudBurstDAWS
        [Grapevine].Phenology.FloweringDOY     as FloweringDAWS
        [Grapevine].Phenology.VeraisonDOY      as VeraisonDAWS
        [Grapevine].Phenology.CurrentStageName as CurrentStageName
        [Grapevine].Phenology.AccChillBefPrune
        [Grapevine].Structure.PrimaryBudNo
        [Grapevine].Structure.MainStemPopn
        [Grapevine].Structure.LeafTipsAppeared
        [Grapevine].Structure.TotalLeavesPerShoot as leaf.no.shoot
        [Grapevine].Leaf.InitialisedCohortNo
        [Grapevine].Leaf.DeadCohortNo
        [Grapevine].Leaf.AppearedCohortNo as leaf.no.shoot.main
        [Grapevine].Leaf.CohortSize
        [Grapevine].Leaf.Transpiration
        [Grapevine].Leaf.LAI/[Grapevine].Population             as leaf.area.vine
        [Grapevine].Leaf.LAI/[Grapevine].Structure.MainStemPopn as leaf.area.shoot
        [Grapevine].Leaf.LAIMainStem/[Grapevine].Structure.MainStemPopn as leaf.area.shoot.main
        [Grapevine].Leaf.LAIBranch/[Grapevine].Structure.MainStemPopn as leaf.area.shoot.lateral
        [Grapevine].Leaf.Fn
        [Grapevine].Leaf.Fw
        [Grapevine].Leaf.Live.Wt
        [Grapevine].Leaf.Live.Wt/[Grapevine].Population as leaf.dw.vine
        [Grapevine].Leaf.Live.Wt/[Grapevine].Structure.MainStemPopn as leaf.dw.shoot
        [Grapevine].Shoot.Live.Wt
        [Grapevine].Shoot.Live.Wt/[Grapevine].Structure.MainStemPopn as shoot.dw.mean
        [Grapevine].Shoot.Live.StructuralWt
        [Grapevine].Shoot.Live.StorageWt
        [Grapevine].Cordon.Live.Wt
        [Grapevine].Cordon.Live.StructuralWt
        [Grapevine].Cordon.Live.StorageWt
        [Grapevine].Trunk.Live.Wt
        [Grapevine].Trunk.Live.StructuralWt
        [Grapevine].Trunk.Live.StorageWt
        [Grapevine].Trunk.Live.StorageWt/[Grapevine].Trunk.Live.Wt as total.NSC.concentration.trunk
        [Grapevine].Root.Live.Wt
        [Grapevine].Fibrousroot.Live.Wt
        [Grapevine].Fibrousroot.Live.StructuralWt
        [Grapevine].Fibrousroot.Live.StorageWt
        [Grapevine].Fibrousroot.Live.StorageWt/[Grapevine].Fibrousroot.Live.Wt as total.NSC.concentration.root
        [Grapevine].Trunk.DMDemands.Structural.Radius
        [Grapevine].Arbitrator.FDM
        [Grapevine].Arbitrator.DM.TotalFixationSupply
        [Grapevine].Berry.Live.Wt
        [Grapevine].Berry.Live.Wt/[Grapevine].Population as TotalBerryDW
        [Grapevine].Berry.SingleBerryDW
        [Grapevine].Berry.SingleBerryFW     as berry.fw.mean
        [Grapevine].Berry.TotalBerryFW/[Grapevine].Population as TotalBerryFW
        [Grapevine].Berry.NumberFunction
        [Grapevine].Berry.ThermalTimeAfterFlowering
        [Grapevine].Berry.WaterContent
        [Grapevine].Berry.Brix 				as brix
        [Grapevine].Berry.TitratableAcid 	as ta
        [Grapevine].Berry.MetFactors.BUN_TmaxIni1    as BUN_TmaxIni
        [Grapevine].Berry.MetFactors.BUN_RadIni1     as BUN_RadIni
        [Grapevine].Berry.MetFactors.BEN_RainTotFlow as BEN_RainTotFlow
        [Grapevine].Berry.MetFactors.BEN_TmaxIni1    as BEN_TmaxIni1
        [Grapevine].Berry.MetFactors.BEN_TmaxFlow   as BEN_TmaxFlow
        [Grapevine].Berry.MetFactors.BEN_TminFlow   as BEN_TminFlow
        [Grapevine].Berry.MetFactors.BM_RadFlow      as BM_RadFlow
        [Grapevine].Berry.MetFactors.BM_RainTotFlow  as BM_RainTotFlow
        [Grapevine].Berry.MetFactors.BM_RainTotVer   as BM_RainTotVer
        [Grapevine].Berry.MetFactors.BM_TmaxFlow    as BM_TmaxFlow
        [Grapevine].Berry.YieldComponent.BunchesPerShoot as bunch.no.shoot
        [Grapevine].Berry.YieldComponent.BunchesPerVine  as bunch.no.vine
        [Grapevine].Berry.YieldComponent.BerryNum    as BerryNum
        [Grapevine].Berry.YieldComponent.BerryMass   as berry.fw.est
        [Grapevine].Berry.YieldPerVine               as yield.per.vine
    Report ReportAlley: EventNames=[Clock].DoReport
      VariableNames:
        [Clock].Today
        [Clock].Today.Year
        [Clock].Today.DayOfYear
        [Weather].DaysSinceWinterSolstice   as DAWS
        [PlantVariables].Script.Height 		as height
        [PlantVariables].Script.LAI         as LAIStrip
        [PlantVariables].Script.FRadInt     as f.rad.int
        [PlantVariables].Script.ET          as transpiration
        [PlantVariables].Script.ES          as Es
        [PlantVariables].Script.PET         as PET
        [PlantVariables].Script.RootDepth   as rootDepth
        [Soil].OutputLayers.SW
        sum([Soil].OutputLayers.SWmm)       as psw
        [Weather].Rain
        [Irrigation].IrrigationApplied
        [Soil].SoilWater.Drainage
    Manager PlantVariables
      FRadInt = 0
      ET = 0
      ES = 0
      PET = 0
      LAI = 0
      Height = 0
      RootDepth = 0
      PlantWidth = 0
```csharp
using Models.Climate;
using System;
using Models.Core;
using Models.PMF;
using System.Collections.Generic;
using Models.Soils;
using APSIM.Shared.Utilities;
using Models.Zones;
using Models.PMF.Organs;

namespace Models
{
    [Serializable]
    public class Script : Model
    {
        [Link] private Weather weather;
        private RectangularZone AlleyZone {get; set; }
        private RectangularZone RowZone {get; set;}
        private RectangularZone ThisZone {get; set;}
        private double AreaWidth {get; set;}

        public double FRadInt {get; set;}
        public double ET {get; set;}
        public double ES {get; set;}
        public double PET {get; set;}
        public double LAI {get; set;}
        public double Height {get; set;}
        public double RootDepth {get; set;}
        public double PlantWidth {get; set;}

        [EventSubscribe("StartOfSimulation")]
        private void DoStartOfSimulation(object sender, EventArgs e)
        {
               
               ThisZone = this.Parent.Parent as RectangularZone;
               RowZone = this.Parent.Parent.Parent.FindInScope("Row") as RectangularZone;
               AlleyZone = (RectangularZone)this.Parent.Parent.Parent.FindInScope("Alley") as RectangularZone;
               AreaWidth = AlleyZone.Width + RowZone.Width;
               PlantWidth = 0;
        }
        
        [EventSubscribe("DoReportCalculations")]
        private void OnDoReportCalculations(object sender, EventArgs e)
        {
            if (ThisZone.Name == "Row")
                {
                FRadInt = ((double)RowZone.Get("Grapevine.Leaf.RadIntTot") * RowZone.Width)/(weather.Radn * AreaWidth);
                ET = (double)RowZone.Get("Grapevine.Leaf.Transpiration") * RowZone.Width/AreaWidth;
                LAI = (double)RowZone.Get("Grapevine.Leaf.LAI");
                //LAIPerVine =  LAI*RowZone.Width*1.8;
                //TreeInitialisation.Script.VineDistance;
                //(double)RowZone.Get("Grapevine.Leaf.LAI");
                Height = (double)RowZone.Get("Grapevine.Leaf.Height");
                RootDepth = (double)RowZone.Get("Grapevine.Root.Depth");
                PlantWidth = (double)RowZone.Get("Grapevine.Leaf.Width");
                }
            else
                {
                FRadInt = ((double)AlleyZone.Get("Slurp.Leaf.RadIntTot") * ThisZone.Width)/ (weather.Radn * AreaWidth);
                ET = (double)AlleyZone.Get("Slurp.Leaf.Transpiration") * ThisZone.Width/AreaWidth;
                LAI = (double)AlleyZone.Get("Slurp.Leaf.LAI");
                Height = (double)AlleyZone.Get("Slurp.Leaf.Height");
                RootDepth = (double)AlleyZone.Get("Slurp.Root.Depth");
                }

            ES = (double)ThisZone.Get("Soil.SoilWater.Es") * ThisZone.Width/AreaWidth;
            double PETWidth = Math.Min(Math.Max(PlantWidth,ThisZone.Width),AreaWidth);
            PET = (double)ThisZone.Get("Soil.SoilWater.Eo") * PETWidth/AreaWidth;
        }
    }
}
```
  DataStore
    ExcelInput PhenoObs: FileNames=[Observations\Observed.xlsx]; SheetNames=[Observed]
    PredictedObserved: PredictedTableName=Report; ObservedTableName=Observed; FieldNameUsedForMatch=Zone; FieldName2UsedForMatch=Clock.Today; FieldName3UsedForMatch=CurrentSeason; AllColumns=false
      Tests: POName=PredictedObserved
        AcceptedStats:
          Name            n     Slope      Intercept  SEslope    SEintercept  R2         RMSE      NSE        ME         MAE        RSR
          BerryMass       47    0.498705   1.29291    0.140453   0.287119     0.218851   0.304353  -4.38478   0.270254   0.273544   2.29569
          BerryNum        46    0.326969   44.1227    0.172749   10.9368      0.0752897  15.2196   -0.803752  2.20099    12.4745    1.32836
          BudBurstDOY     52    0.363747   69.8711    0.292194   31.0835      0.0300629  11.5841   -3.86018   2.26923    9          2.18328
          BunchesPerVine  47    0.223697   49.3808    0.0459706  2.9971       0.344776   7.30888   0.29425    -0.778388  5.55235    0.831104
          f.rad.int       1319  0.592548   0.149686   0.021119   0.00898466   0.374117   0.126271  0.238098   -0.013327  0.0910711  0.872539
          FloweringDOY    52    0.59547    70.0874    0.166426   28.9438      0.203846   6.83599   -0.550296  -0.230769  5.57692    1.23308
          psw             578   0.694401   102.257    0.020363   4.48738      0.668753   52.6501   0.315113   37.7803    44.4182    0.826863
          transpiration   965   0.0900816  0.733349   0.0153528  0.0304933    0.0345158  1.28969   -0.904386  -0.861343  1.00372    1.37928
          VeraisonDOY     52    0.69358    72.749     0.121745   28.9877      0.393614   6.94622   0.164497   -0.173077  5.36538    0.905227
        AcceptedStatsName=Name n Slope Intercept SEslope SEintercept R2 RMSE NSE ME MAE RSR
  Folder BaseSim
    Simulation BaseSim
      Weather: FileName=Site1003_SEA.met
      Clock: Start=2003-02-25; End=2006-05-01
      Summary
      SoilArbitrator Soil Arbitrator
      MicroClimate: a_interception=0; b_interception=1; c_interception=0; d_interception=0; soil_albedo=0.23; SoilHeatFluxFraction=0.4; MinimumHeightDiffForNewLayer=0; NightInterceptionFraction=0.5; ReferenceHeight=2
      RectangularZone Row: Length=100; Width=0.9; Slope=0; AspectAngle=0; Altitude=50
        Report: EventNames=[Clock].DoReport
          VariableNames:
            [Clock].Today
            [Clock].Today.Year
            [Clock].Today.DayOfYear
            [Weather].DaysSinceWinterSolstice   as DAWS
            [PlantVariables].Script.Height 		as height
            [PlantVariables].Script.LAI         as lai
            [PlantVariables].Script.FRadInt     as f.rad.int
            [PlantVariables].Script.ET          as transpiration
            [PlantVariables].Script.ES          as Es
            [PlantVariables].Script.PET         as PET
            [PlantVariables].Script.RootDepth   as rootDepth
            [Soil].OutputLayers.SW
            sum([Soil].OutputLayers.SWmm)       as psw
            [Weather].Rain
            [Irrigation].IrrigationApplied
            [Soil].SoilWater.Drainage
            [Grapevine].Phenology.CurrentSeason as CurrentSeason
            [Grapevine].Phenology.Stage
            [Grapevine].Phenology.AccumulatedEmergedTT
            [Grapevine].Phenology.BudBurstDOY      as BudBurstDAWS
            [Grapevine].Phenology.FloweringDOY     as FloweringDAWS
            [Grapevine].Phenology.VeraisonDOY      as VeraisonDAWS
            [Grapevine].Phenology.CurrentStageName as CurrentStageName
            [Grapevine].Phenology.AccChillBefPrune
            [Grapevine].Structure.PrimaryBudNo
            [Grapevine].Structure.MainStemPopn
            [Grapevine].Structure.LeafTipsAppeared
            [Grapevine].Structure.TotalLeavesPerShoot as leaf.no.shoot
            [Grapevine].Leaf.InitialisedCohortNo
            [Grapevine].Leaf.DeadCohortNo
            [Grapevine].Leaf.AppearedCohortNo
            [Grapevine].Leaf.CohortSize
            [Grapevine].Leaf.LAI as LAI
            [Grapevine].Leaf.LAI/[Grapevine].Population             as leaf.area.vine
            [Grapevine].Leaf.LAI/[Grapevine].Structure.MainStemPopn as leaf.area.shoot
            [Grapevine].Leaf.LAIMainStem/[Grapevine].Structure.MainStemPopn as leaf.area.shoot.main
            [Grapevine].Leaf.LAIBranch/[Grapevine].Structure.MainStemPopn as leaf.area.shoot.lateral
            [Grapevine].Leaf.Fn
            [Grapevine].Leaf.Fw
            [Grapevine].Leaf.Live.Wt
            [Grapevine].Leaf.Live.Wt/[Grapevine].Structure.MainStemPopn as leaf.dw.shoot
            [Grapevine].Shoot.Live.Wt
            [Grapevine].Shoot.Live.Wt/[Grapevine].Structure.MainStemPopn as shoot.dw
            [Grapevine].Shoot.Live.StructuralWt
            [Grapevine].Shoot.Live.StorageWt
            [Grapevine].Cordon.Live.Wt
            [Grapevine].Cordon.Live.StructuralWt
            [Grapevine].Cordon.Live.StorageWt
            [Grapevine].Trunk.Live.Wt
            [Grapevine].Trunk.Live.StructuralWt
            [Grapevine].Trunk.Live.StorageWt
            [Grapevine].Trunk.Live.StorageWt/[Grapevine].Trunk.Live.Wt as total.NSC.concentration.trunk
            [Grapevine].Root.Live.Wt
            [Grapevine].Fibrousroot.Live.Wt
            [Grapevine].Fibrousroot.Live.StructuralWt
            [Grapevine].Fibrousroot.Live.StorageWt
            [Grapevine].Fibrousroot.Live.StorageWt/[Grapevine].Fibrousroot.Live.Wt as total.NSC.concentration.root
            [Grapevine].Arbitrator.FDM
            [Grapevine].Arbitrator.DM.TotalFixationSupply
            [Grapevine].Berry.Live.Wt
            [Grapevine].Berry.SingleBerryDW
            [Grapevine].Berry.SingleBerryFW     as berry.fw.mean
            [Grapevine].Berry.TotalBerryFW
            [Grapevine].Berry.NumberFunction
            [Grapevine].Berry.ThermalTimeAfterFlowering
            [Grapevine].Berry.WaterContent
            [Grapevine].Berry.Brix 				as brix
            [Grapevine].Berry.TitratableAcid 	as ta
            [Grapevine].Berry.MetFactors.BUN_TmaxIni1    as BUN_TmaxIni
            [Grapevine].Berry.MetFactors.BUN_RadIni1     as BUN_RadIni
            [Grapevine].Berry.MetFactors.BEN_RainTotFlow as BEN_RainTotFlow
            [Grapevine].Berry.MetFactors.BEN_TmaxIni1    as BEN_TmaxIni1
            [Grapevine].Berry.MetFactors.BEN_TmeanFlow   as BEN_TmeanFlow
            [Grapevine].Berry.MetFactors.BM_RadFlow      as BM_RadFlow
            [Grapevine].Berry.MetFactors.BM_RainTotFlow  as BM_RainTotFlow
            [Grapevine].Berry.MetFactors.BM_RainTotVer   as BM_RainTotVer
            [Grapevine].Berry.MetFactors.BM_TmeanFlow    as BM_TmeanFlow
            [Grapevine].Berry.YieldComponent.BunchesPerShoot as bunch.no.shoot
            [Grapevine].Berry.YieldComponent.BunchesPerVine  as bunch.no.vine
            [Grapevine].Berry.YieldComponent.BerryNum    as BerryNum
            [Grapevine].Berry.YieldComponent.BerryMass   as berry.fw.est
            [Grapevine].Berry.YieldPerVine               as yield.per.vine
        Memo
          Double Guyôt-trained vines, pruned each year to retain 24 nodes were monitored. Vines were trained using vertical shoot positioning (VSP), with an exposed leaf area height of 1.2 m, and trimmed to maintain a compact canopy. Vines were planted 1.8 m apart within the row, and 2.4 m apart between rows. Average flowering date was determined by monitoring all the inflorescences on one cane on a vine in each plot on a regular basis throughout flowering. Likewise, regular berry samples (at least weekly) were taken from before the date of véraison until harvest at a soluble solids concentration value of 21.5 oBrix.
        Plant Grapevine
        Manager TreeInitialisation
          CultivarName = SauvignonBlanc
          SowingDate = 02/25/2003 00:00:00
          VineDistance = 1.8
          BudNumber = 24
          CordonNumber = 2
          CordonDiameter = 10
          CordonLength = 1
          TrunkDiameter = 40
          TrunkHeight = 0.9
          RootDM = 2000
          RootNSC = 0.3
          TrunkNSC = 0.3
          CordonNSC = 0.3
          StartAge = 10
```csharp
using Models.Zones;
using Models.Soils;
using APSIM.Shared.Utilities;
using Models.PMF;
using Models.Core;
using System;
        
namespace Models
{
    [Serializable] 
    [System.Xml.Serialization.XmlInclude(typeof(Model))]
    public class Script : Model
    {
        [Link] Plant Grapevine;
        [Link] Clock Clock;
        [Link] Soil Soil;
        [Link] Zone zone;

        [Display(Type = DisplayType.CultivarName)]
        [Description("Plant Type")]
        public string CultivarName { get; set; }

        [Description("Initialisation Date")]
        public DateTime SowingDate { get; set; }

        [Description("Vine distance(m)")]
        public double VineDistance { get; set; }
        //number of buds lay down in cane and spur. there is a function inside to calculate the number of buds per vine based on bud burst and from cane head
        [Description("Bud number(#)")]
        public double BudNumber { get; set; }
        //cordon or spur biomass
        [Description("Cordon number(#)")]
        public double CordonNumber { get; set; }
      
        [Description("Cordon diameter(mm)")]
        public double CordonDiameter { get; set; }

        [Description("Cordon length(m)")]
        public double CordonLength { get; set; }
        //trunk information
        [Description("Trunk diameter(mm)")]
        public double TrunkDiameter { get; set; }

        [Description("Trunk height(m)")]
        public double TrunkHeight { get; set; }
        //root dry matter
        [Description("Fibrous Root dry matter(g/vine)")]
        public double RootDM { get; set; }

        //total nonstructural fraction in dry matter 
        [Description("Fibrous root nonstructural carbon fraction")]
        public double RootNSC { get; set; }

        [Description("Trunk nonstructural carbon fraction")]
        public double TrunkNSC { get; set; }

        [Description("Cordon nonstructural carbon fraction")]
        public double CordonNSC { get; set; }

        [Description("Age of trees (in Years) at start of simulation)")]
        public int StartAge {get;set;}

        private RectangularZone RowZone {get; set;}

        [EventSubscribe("DoManagement")]
        private void OnDoManagement(object sender, EventArgs e)
        {
            if (Clock.Today.Date == SowingDate)
            {
                RowZone = this.Parent.Parent.Parent.FindInScope("Row") as RectangularZone;
                double pop = 1/RowZone.Width/VineDistance;  
                //sowing method
                Grapevine.Sow(cultivar: CultivarName,population: pop, 
                depth: 2000, rowSpacing: RowZone.Width, budNumber:BudNumber);

                //cordon biomass
                //calculate the biomass by length 1 meter time number of cordons time wood density (0.5 g/mm2/m) * pop to covert the biomass into g/m2
                double cordonBiomass = 3.1415926*(CordonDiameter/2)*(CordonDiameter/2)*CordonLength*CordonNumber*0.5 * pop; 
                double cordonNSC = cordonBiomass * CordonNSC;

                zone.Set("[Grapevine].Cordon.Live.StorageWt", cordonNSC);                
                zone.Set("[Grapevine].Cordon.Live.StructuralWt", cordonBiomass - cordonNSC);                

                //trunk biomass
                double trunkBiomass = 3.1415926*(TrunkDiameter/2)*(TrunkDiameter/2)*TrunkHeight*0.5 * pop; 
                double trunkNSC = trunkBiomass * TrunkNSC;
               
                zone.Set("[Grapevine].Trunk.Live.StorageWt", trunkNSC); 
                zone.Set("[Grapevine].Trunk.Live.StructuralWt", trunkBiomass - trunkNSC);              
                

                //Root biomass is  per plant
                double rootBiomass = RootDM * pop;
                double rootNSC = RootDM * pop * RootNSC; 
                 zone.Set("[Grapevine].Fibrousroot.Live.StorageWt",    rootNSC ); //rootNSC*pop
                 zone.Set("[Grapevine].Fibrousroot.Live.StructuralWt", rootBiomass - rootNSC); 
               
            }
        }
    }
}
```
        Irrigation
        Fertiliser
        SurfaceOrganicMatter: InitialResidueName=wheat_stubble; InitialResidueType=wheat; InitialResidueMass=500; InitialStandingFraction=0; InitialCPR=0; InitialCNR=100
        Soil: Latitude=0; Longitude=0
          LayerStructure: Thickness=[200, 200, 200, 200, 200, 200, 400, 400, 400, 600]
          Chemical
            Thickness  NO3N     NH4N  PH
            100        160.741  0     6.6
            200        11.1111  0     6.2
            300        1.21212  0     5.7
            300        1.19048  0     5.5
            300        0        0     5.5
            300        0        0     5.5
          InitialWater Initial water: PercentMethod=1; FractionFull=1; RelativeTo=LL15
          Physical
            Thickness  BD    AirDry  LL15  DUL   SAT
            200        1.35  0.1     0.2   0.35  0.45
            250        1.35  0.1     0.2   0.35  0.45
            300        1.4   0.15    0.15  0.35  0.4
            150        1.4   0.13    0.13  0.33  0.35
            150        1.4   0.1     0.1   0.28  0.35
            1950       1.59  0.06    0.06  0.1   0.3
            SoilCrop GrapevineSoil: LL=[0.2, 0.2, 0.15, 0.13, 0.1, 0.06]; KL=[0.25, 0.1, 0.08, 0.05, 0.05, 0.01]; XF=[1, 1, 1, 1, 1, 1]
            SoilCrop SlurpSoil: LL=[0.2, 0.2, 0.15, 0.13, 0.1, 0.06]; KL=[0.11, 0.11, 0.11, 0.11, 0.11, 0.11]; XF=[1, 1, 1, 1, 1, 1]
          WaterBalance SoilWater: SummerDate=1-Nov; SummerU=4; SummerCona=1; WinterDate=1-Apr; WinterU=4; WinterCona=1; DiffusConst=88; DiffusSlope=35.4; Salb=0.18; CN2Bare=68; CNRed=20; CNCov=0.8; Slope=0; DischargeWidth=0; CatchmentArea=0
            Thickness  SWCON  KLAT
            150        0.55   0
            150        0.55   0
            100        0.55   0
            200        0.55   0
            200        0.55   0
            200        0.55   0
            200        0.55   0
            200        0.55   0
            200        0.55   0
            200        0.55   0
            200        0.55   0
            200        0.55   0
            400        0.55   0
          SoilNitrogen: fom_types=[default, manure, mucuna, lablab, shemp, stable]; fract_carb=[0.2, 0.3, 0.54, 0.57, 0.45, 0]; fract_cell=[0.7, 0.3, 0.37, 0.37, 0.47, 0.1]; fract_lign=[0.1, 0.4, 0.09, 0.06, 0.08, 0.9]; NPartitionApproach=0
            SoilNitrogenNO3 NO3
            SoilNitrogenNH4 NH4
            SoilNitrogenUrea Urea
            SoilNitrogenPlantAvailableNO3 PlantAvailableNO3
            SoilNitrogenPlantAvailableNH4 PlantAvailableNH4
          Organic: FOMCNRatio=30
            Thickness  Carbon  SoilCNRatio  FBiom  FInert  FOM
            100        1.82    11.5         0.025  0.3     1243.93
            200        1.47    11.5         0.025  0.4     833.832
            300        1.2     11.5         0.015  0.75    457.617
            300        1.03    11.5         0.01   0.9     251.145
            300        0.47    11.5         0.01   0.96    137.831
            300        0.47    11.5         0.01   0.96    75.6435
          CERESSoilTemperature Temperature
          OutputLayers: Thickness=[150, 150, 150, 150, 150, 150, 150]
        Manager SetupTreeRootZones
          UseExtraZone = True
```csharp
using Models.PMF.Organs;
using System;
using Models.Core;
using System.Collections.Generic;
using System.Text;
using Models.PMF;
using Models;
using System.Xml.Serialization;
using APSIM.Shared.Utilities;
using Models.Functions;

namespace Models
{
    [Serializable] 
    public class Script : Model
    {
        [Link] private Plant Grapevine;
        [Link] private Clock Clock;
        [Link] private Zone zone;
        [Link(Type = LinkType.Path, Path = "[Grapevine].Root")]
        private Root root;

        [Description("Use extra root zone")]
        public bool UseExtraZone { get; set; }

        
        [EventSubscribe("StartOfSimulation")]
        private void OnSimulationCommencing(object sender, EventArgs e)
        {
            if (UseExtraZone)
            {
            root.ZoneNamesToGrowRootsIn.Add("Alley");
            root.ZoneRootDepths.Add(2600);
BiomassDemand InitialDM = new BiomassDemand();
Constant InitStruct = new Constant();
InitStruct.FixedValue = 10;
InitialDM.Structural = InitStruct;
Constant InitMetab = new Constant();
InitMetab.FixedValue = 0;
InitialDM.Metabolic = InitMetab;
Constant InitStor = new Constant();
InitStor.FixedValue = 0;
InitialDM.Storage = InitStor;
            root.ZoneInitialDM.Add(InitialDM);

            }
        }
    }
}
```
        Operations VineIrrigation
        Operations WinterRainfall
          2002-05-28  [Irrigation].Apply(200);
        Manager PlantVariables
          FRadInt = 0
          ET = 0
          ES = 0
          PET = 0
          LAI = 0
          Height = 0
          RootDepth = 0
          PlantWidth = 0
```csharp
using Models.Climate;
using System;
using Models.Core;
using Models.PMF;
using System.Collections.Generic;
using Models.Soils;
using APSIM.Shared.Utilities;
using Models.Zones;
using Models.PMF.Organs;

namespace Models
{
    [Serializable]
    public class Script : Model
    {
        [Link] private Weather weather;
        [Link(Type = LinkType.Path, Path = "[Grapevine].Root")]
        private Root root;
        private RectangularZone AlleyZone {get; set; }
        private RectangularZone RowZone {get; set;}
        private RectangularZone ThisZone {get; set;}
        private double AreaWidth {get; set;}

        public double FRadInt {get; set;}
        public double ET {get; set;}
        public double ES {get; set;}
        public double PET {get; set;}
        public double LAI {get; set;}
        public double Height {get; set;}
        public double RootDepth {get; set;}
        public double PlantWidth {get; set;}

        [EventSubscribe("StartOfSimulation")]
        private void DoStartOfSimulation(object sender, EventArgs e)
        {
               
               ThisZone = this.Parent.Parent as RectangularZone;
               RowZone = this.Parent.Parent.Parent.FindInScope("Row") as RectangularZone;
               AlleyZone = (RectangularZone)this.Parent.Parent.Parent.FindInScope("Alley") as RectangularZone;
               AreaWidth = AlleyZone.Width + RowZone.Width;
               PlantWidth = 0;
        }
        
        [EventSubscribe("DoReportCalculations")]
        private void OnDoReportCalculations(object sender, EventArgs e)
        {
            if (ThisZone.Name == "Row")
                {
                FRadInt = ((double)RowZone.Get("Grapevine.Leaf.RadIntTot") * RowZone.Width)/(weather.Radn * AreaWidth);
                ET = (double)RowZone.Get("Grapevine.Leaf.Transpiration") * RowZone.Width/AreaWidth;
                LAI = (double)RowZone.Get("Grapevine.Leaf.LAI");
                //LAIPerVine =  LAI*RowZone.Width*1.8;
                //TreeInitialisation.Script.VineDistance;
                //(double)RowZone.Get("Grapevine.Leaf.LAI");
                Height = (double)RowZone.Get("Grapevine.Leaf.Height");
                RootDepth = (double)RowZone.Get("Grapevine.Root.Depth");
                PlantWidth = (double)RowZone.Get("Grapevine.Leaf.Width");
                }
            else
                {
                FRadInt = ((double)AlleyZone.Get("Slurp.Leaf.RadIntTot") * ThisZone.Width)/ (weather.Radn * AreaWidth);
                ET = (double)AlleyZone.Get("Slurp.Leaf.Transpiration") * ThisZone.Width/AreaWidth;
                LAI = (double)AlleyZone.Get("Slurp.Leaf.LAI");
                Height = (double)AlleyZone.Get("Slurp.Leaf.Height");
                RootDepth = (double)AlleyZone.Get("Slurp.Root.Depth");
                }

            ES = (double)ThisZone.Get("Soil.SoilWater.Es") * ThisZone.Width/AreaWidth;
            double PETWidth = Math.Min(Math.Max(PlantWidth,ThisZone.Width),AreaWidth);
            PET = (double)ThisZone.Get("Soil.SoilWater.Eo") * PETWidth/AreaWidth;
        }
    }
}
```
        Manager DripIrrigator
          FertilizeDAWS = 100
          Amount = 20
          totalIrrigation = 0
```csharp
using Models.Climate;
using System;
using Models.Core;
using System.Collections.Generic;
using System.Text;
using Models.Soils;
using Models.PMF;
using Models;
using System.Xml.Serialization;
using APSIM.Shared.Utilities;

namespace Models
{
    [Serializable] 
    public class Script : Model
    {
       [Link] Irrigation irrigation;
       [Link] Clock Clock;
       [Link] Fertiliser Fertiliser;
       [Link] Summary Summary;
       [Link] Weather weather;

        [Description("Fertilize_DAWS")]
         public int FertilizeDAWS { get; set; }
        [Description("Amount of fertiliser to be applied")]
        public double Amount { get; set; }

       [EventSubscribe("DoManagement")]
        private void OnDoManagement(object sender, EventArgs e)
        {
          if (weather.DaysSinceWinterSolstice == FertilizeDAWS)
           Fertiliser.Apply(Amount: Amount, Type: Fertiliser.Types.NO3N);
        }


       public void applyDripIrri(double amount)
        {
            double layerAmount = amount/4;
            irrigation.Apply(layerAmount, 0);
            irrigation.Apply(layerAmount*2, 220);
            irrigation.Apply(layerAmount, 420);

        }
        public double totalIrrigation {get; set;}
        [EventSubscribe("Irrigated")]
        private void OnIrrigated(object sender, 
        IrrigationApplicationType irrigData)
        {
            totalIrrigation += irrigData.Amount;
         }
    }
}
```
        Manager HarvestNPruning
          LeafPluckingDAWS = 205
          HarvestDAWS = 290
          PruningDAWS = 314
          FrostDate1 = 10/03/2002 00:00:00
          FrostDate2 = 11/18/2002 00:00:00
```csharp
using Models.PMF.Phen;
using Models.PMF.Organs;
using System.Xml.Serialization;
using Models.PMF.Interfaces;
using Models.PMF;
using Models.Core;
using System.Collections.Generic;
using System;
using Models.Climate;
using Models.PMF.Struct;

namespace Models
{
    [Serializable] 
    [System.Xml.Serialization.XmlInclude(typeof(Model))]
    public class Script : Model
    {
        [Link] private Plant Grapevine;
        [Link] private Clock Clock;
        [Link] private Zone zone;
        [Link] private Weather weather;
        [Link]
        private Root root;
        [Link(Type = LinkType.Path, Path = "[Grapevine].Structure")]
        private Structure structure;
        [Link(Type = LinkType.Path, Path = "[Grapevine].Phenology")]
        private Phenology phenology;
       
        [Description("SummerPruning_DAWS")]         
        public int LeafPluckingDAWS { get; set; }  //day

        [Description("Harvest_DAWS")]
        public int HarvestDAWS { get; set; }

        [Description("Pruning_DAWS")]         
        public int PruningDAWS { get; set; }  //day

        [Description("Frost Date 1")]
        public DateTime FrostDate1 { get; set; }
        [Description("Frost Date 2")]
        public DateTime FrostDate2 { get; set; }


        [XmlIgnore] private RemovalFractions Remove_1 { get; set; }
        [XmlIgnore] private RemovalFractions Remove_2 { get; set; }
        [XmlIgnore] private RemovalFractions Remove_3 { get; set; }
        [XmlIgnore] private RemovalFractions Remove_4 { get; set; }
        [XmlIgnore] private RemovalFractions Remove_5 { get; set; }
        [EventSubscribe("StartOfSimulation")]
        private void OnSimulationCommencing(object sender, EventArgs e)
        {
            Remove_1 = new RemovalFractions();
            Remove_2 = new RemovalFractions();
            Remove_3 = new RemovalFractions();
            Remove_4 = new RemovalFractions();
            Remove_5 = new RemovalFractions();
        }
        
        [EventSubscribe("DoManagement")]
        private void OnDoManagement(object sender, EventArgs e)
        {
             //Set up  array of remove fractions to send with Cut method.  Each member in the array corresponds to an organ in the same order they are set up in.
             //PruneDate = DateTime.Parse(PruneDateString);
             if (weather.DaysSinceWinterSolstice == LeafPluckingDAWS && phenology.Stage >= 3)
             {
                    
                //int LeafTipsAppeared = (int)structure.LeafTipsAppeared;
                //int NodesToRemove = (int)Math.Max(LeafTipsAppeared - TargetLeafRank, 1); 
                double FractionToRemove = 0.3; //1- TargetLeafRank/LeafTipsAppeared;
            
                Remove_1.SetFractionToRemove("Leaf", 0, "live");
                Remove_1.SetFractionToRemove("Shoot", 0);
                Remove_1.SetFractionToRemove("Cordon", 0);
                Remove_1.SetFractionToRemove("Trunk", 0);
                Remove_1.SetFractionToRemove("Root", 0);
                Remove_1.SetFractionToRemove("Fibrousroot", 0);
                Remove_1.SetFractionToRemove("Berry", 0);
            
                Remove_1.SetFractionToResidue("Leaf", FractionToRemove, "live");
                Remove_1.SetFractionToResidue("Shoot", FractionToRemove);
                Remove_1.SetFractionToResidue("Cordon", 0);
                Remove_1.SetFractionToResidue("Trunk", 0);
                Remove_1.SetFractionToResidue("Root", 0);
                Remove_1.SetFractionToRemove("Fibrousroot", 0);
                Remove_1.SetFractionToResidue("Berry", 0);
            
               // Remove_1.NodesToRemove = NodesToRemove;
                Grapevine.RemoveBiomass("LeafPluck", Remove_1);
        
             }

           if (weather.DaysSinceWinterSolstice == HarvestDAWS && phenology.Stage >= 3)
           {
               
               Remove_2.SetFractionToRemove("Leaf", 0, "live");
               Remove_2.SetFractionToRemove("Shoot",  0);
               Remove_2.SetFractionToRemove("Cordon", 0);
               Remove_2.SetFractionToRemove("Trunk",  0);
               Remove_2.SetFractionToRemove("Root",   0);
               Remove_2.SetFractionToRemove("Fibrousroot", 0);
               Remove_2.SetFractionToRemove("Berry",  1);
         
               Remove_2.SetFractionToResidue("Leaf",   0.2, "live");
               Remove_2.SetFractionToResidue("Shoot",  0);
               Remove_2.SetFractionToResidue("Cordon", 0);
               Remove_2.SetFractionToResidue("Trunk",  0);
               Remove_2.SetFractionToResidue("Root",   0);
               Remove_2.SetFractionToRemove("Fibrousroot", 0);
               Remove_2.SetFractionToResidue("Berry",  0);
         
               Grapevine.RemoveBiomass("LeafPluck", Remove_2);
           }
                                   
            if (weather.DaysSinceWinterSolstice == PruningDAWS&& phenology.Stage >= 3)
            {
                Remove_3.SetPhenologyStage = 1;

                Remove_3.SetFractionToRemove("Leaf",   0, "live");
                Remove_3.SetFractionToRemove("Shoot",  0);
                Remove_3.SetFractionToRemove("Cordon", 0);
                Remove_3.SetFractionToRemove("Trunk",  0);
                Remove_3.SetFractionToRemove("Root",   0);
                Remove_3.SetFractionToRemove("Berry",  0);

                Remove_3.SetFractionToResidue("Leaf",   1, "live");
                Remove_3.SetFractionToResidue("Shoot",  1);
                Remove_3.SetFractionToResidue("Cordon", 1);
                Remove_3.SetFractionToResidue("Trunk",  0);
                Remove_3.SetFractionToResidue("Root",   0);
                Remove_3.SetFractionToRemove("Fibrousroot", 0);
                Remove_3.SetFractionToResidue("Berry",  1);

                Grapevine.RemoveBiomass("Prune", Remove_3);

                double cordonBiomass = 96.9; //g/m2 reset the cordon biomass to the original value 
                double cordonNSC = cordonBiomass * 0.18;

                zone.Set("[Grapevine].Cordon.Live.StorageWt", cordonNSC);                
                zone.Set("[Grapevine].Cordon.Live.StructuralWt", cordonBiomass - cordonNSC); 

                //zone.Set("[Grapevine].Trunk.Live.StructuralWt", 280);     
               // zone.Set("[Grapevine].Trunk.Live.StorageWt", 70);     

               // zone.Set("[Grapevine].Root.Live.StructuralWt", 1531);     
               // zone.Set("[Grapevine].Root.Live.StorageWt",  349);     

            }
           if (Clock.Today.Date == FrostDate1)      
           {
              Remove_4.SetFractionToRemove("Leaf", 0, "live");
              Remove_4.SetFractionToRemove("Shoot",  0);
              Remove_4.SetFractionToRemove("Cordon", 0);
              Remove_4.SetFractionToRemove("Trunk",  0);
              Remove_4.SetFractionToRemove("Root",   0);
              Remove_4.SetFractionToRemove("Fibrousroot", 0);
              Remove_4.SetFractionToRemove("Berry",  0);
           //
              Remove_4.SetFractionToResidue("Leaf",   0.2, "live");
              Remove_4.SetFractionToResidue("Shoot",  0);
              Remove_4.SetFractionToResidue("Cordon", 0);
              Remove_4.SetFractionToResidue("Trunk",  0);
              Remove_4.SetFractionToResidue("Root",   0);
              Remove_4.SetFractionToRemove("Fibrousroot", 0);
              Remove_4.SetFractionToResidue("Berry",  0);
           //
              Grapevine.RemoveBiomass("LeafPluck", Remove_4);
              zone.Set("[Grapevine].Structure.FinalLeafNumber.FixedValue", 28); 
           //
           }  

           if (Clock.Today.Date == FrostDate2)      
           {
              Remove_5.SetFractionToRemove("Leaf", 0, "live");
              Remove_5.SetFractionToRemove("Shoot",  0);
              Remove_5.SetFractionToRemove("Cordon", 0);
              Remove_5.SetFractionToRemove("Trunk",  0);
              Remove_5.SetFractionToRemove("Root",   0);
              Remove_5.SetFractionToRemove("Fibrousroot", 0);
              Remove_5.SetFractionToRemove("Berry",  0);
           //
              Remove_5.SetFractionToResidue("Leaf",   0.2, "live");
              Remove_5.SetFractionToResidue("Shoot",  0);
              Remove_5.SetFractionToResidue("Cordon", 0);
              Remove_5.SetFractionToResidue("Trunk",  0);
              Remove_5.SetFractionToResidue("Root",   0);
              Remove_5.SetFractionToRemove("Fibrousroot", 0);
              Remove_5.SetFractionToResidue("Berry",  0);
           //
              Grapevine.RemoveBiomass("LeafPluck", Remove_5);
           //
           }  

        }
    }
}
```
      RectangularZone Alley: Length=100; Width=1.5; Slope=0; AspectAngle=0; Altitude=50
        Report ReportAlley: EventNames=[Clock].DoReport
          VariableNames:
            [Clock].Today
            [Clock].Today.Year
            [Clock].Today.DayOfYear
            [Weather].DaysSinceWinterSolstice   as DAWS
            [PlantVariables].Script.Height 		as height
            [PlantVariables].Script.LAI         as lai
            [PlantVariables].Script.FRadInt     as f.rad.int
            [PlantVariables].Script.ET          as transpiration
            [PlantVariables].Script.ES          as Es
            [PlantVariables].Script.PET         as PET
            [PlantVariables].Script.RootDepth   as rootDepth
            [Soil].OutputLayers.SW
            sum([Soil].OutputLayers.SWmm)       as psw
            [Weather].Rain
            [Irrigation].IrrigationApplied
            [Soil].SoilWater.Drainage
        SurfaceOrganicMatter: InitialResidueName=wheat_stubble; InitialResidueType=wheat; InitialResidueMass=500; InitialStandingFraction=0; InitialCPR=0; InitialCNR=100
        Plant Slurp
        Fertiliser
        Irrigation
        Manager PastureInitialisation
          CultivarName = StaticCrop
          InitialRootDepth = 2000
          SowingDate = 02/25/2003 00:00:00
          RootDepth = 2000
          RFV = 10
          KLReductionFactor = -0.001
          KLReductionDepth = 150
          YKLModifiers =
          XDepth =
          MaxG = 0.004
          R50 = 150
```csharp
using Models.Interfaces;
using Models.PMF.Organs;
using System;
using Models.Core;
using Models.PMF;
using APSIM.Shared.Utilities;
using Models.Soils;
        
namespace Models
{
    [Serializable] 
    [System.Xml.Serialization.XmlInclude(typeof(Model))]
    public class Script : Model
    {
        [Link] private Plant Slurp;
        [Link] private Clock Clock;
        [Link] private Soil Soil;
        [Link] private Zone zone;
        [Link(Type = LinkType.Path, Path = "[Slurp].Root")]
        private Root root;
        [Link]
        private IPhysical soilPhysical;

        [Display(Type = DisplayType.CultivarName)]
        [Description("Plant Type")]
        public string CultivarName { get; set; }
        [Description("Initial Root Depth")]
        public double InitialRootDepth { get; set; }
        [Description("Initialisation Date")]
        public DateTime SowingDate { get; set; }
        [Description("Maximum Root Depth")]
        public double RootDepth { get; set; }
        [Description("Roof Front Velocity")]
        public double RFV { get; set; }
        [Description("Factor to change Kl modifier with Depth")]
        public double KLReductionFactor { get; set; }
        [Description("Depth that KL starts to decline")]
        public double KLReductionDepth { get; set; }
        
        public double[] YKLModifiers { get; set; }
        public double[] XDepth { get; set; }
        private double Depth { get; set; }
        
        [Description("Maximum Stomatal Conductance")]
        public double MaxG { get; set; }
        [Description("Stomatal Radn response")]
        public double R50 { get; set; }
        
        [EventSubscribe("DoManagement")]
        private void OnDoManagement(object sender, EventArgs e)
        {
            if (Clock.Today.Date == SowingDate)
            {
                Slurp.Sow(cultivar: CultivarName, population: 1, depth: InitialRootDepth, rowSpacing: 150);
                
                YKLModifiers = new double[soilPhysical.Thickness.Length];
                XDepth = new double[soilPhysical.Thickness.Length];
                Depth = 0;
                for (int layer = 0; layer < soilPhysical.Thickness.Length; layer++)
                {
                    Depth += soilPhysical.Thickness[layer] / 2;  //Add half of the thickness of the current layer so depth is the mid depth of that layer
                    if (Depth <= KLReductionDepth)
                    {
                        YKLModifiers[layer] = 1;
                        XDepth[layer] = Depth;
                    }
                    else
                    {
                        double KLMod = 1 * Math.Exp(-KLReductionFactor * (Depth - KLReductionDepth));
                        YKLModifiers[layer] = KLMod;
                        XDepth[layer] = Depth;
                    }
                    Depth += soilPhysical.Thickness[layer] / 2;  //Add the other half of the current layer so depth is the top of the next layer
                }
                object KLMods = YKLModifiers;
                zone.Set("Slurp.Root.KLModifier.XYPairs.Y", KLMods);
                object Depths = XDepth;
                zone.Set("Slurp.Root.KLModifier.XYPairs.X", Depths);
                object RD = RootDepth;
                zone.Set("Slurp.Root.MaximumRootDepth.FixedValue", RD);
                object RV = RFV;
                zone.Set("Slurp.Root.RootFrontVelocity.Potential.FixedValue", RV);
                object GMaxValue = MaxG;
                zone.Set("Slurp.Leaf.Gsmax350", GMaxValue); 
                object R50Value = R50; 
                zone.Set("Slurp.Leaf.R50", R50Value); 
                
            }
        }
    }
}
```
        Manager SetPastureVariables
          Ext_coef = 0.6
          MaximumHeight = 300
          MinimumHeight = 100
          Cover = 0
          LAI = 0
```csharp
using Models.Climate;
using System;
using Models.Core;
using System.Collections.Generic;
using System.Text;
using Models.PMF;
using Models;
using System.Xml.Serialization;
using APSIM.Shared.Utilities;
using System.Data;

namespace Models
{
    [Serializable] 
    //[System.Xml.Serialization.XmlInclude(typeof(Model))]
    public class Script : Model
    {
        [Link] Plant Slurp;
        [Link] Clock Clock;
        [Link] Zone zone;
        [Link] Weather weather;

        
        [Description("Extinction coefficient")]
        public  double Ext_coef { get; set; }
        [Description("Maximum height of leaves")]
        public double MaximumHeight { get; set; }
        [Description("Minimum height of leaves")]
        public double MinimumHeight { get; set; }
        
        public double Cover {get; private set;}
        public double LAI { get; private set; }
                
        [EventSubscribe("StartOfSimulation")]
        private void OnStartOfSimulation(object sender, EventArgs e)
        {
            Cover = 0.5;
        }
        
        [EventSubscribe("StartOfDay")]
        private void OnStartOfDay(object sender, EventArgs e)
        {
            Cover += weather.MeanT * 0.001;

            if (Cover >= 1.0)
            {
                Cover = 0.5;        
            }

              LAI = Math.Log(1 - Cover) / -Ext_coef;

            object LAIResetValue = LAI;
            zone.Set("Slurp.Leaf.Area.FixedValue", LAIResetValue);  
            object HeightResetValue = MinimumHeight + Cover * (MaximumHeight-MinimumHeight);
            zone.Set("Slurp.Leaf.Tallness.FixedValue", HeightResetValue);  
        }
    }
}
```
        Manager SetupPastureRootZones
          UseExtraZone = True
```csharp
using Models.PMF.Organs;
using System;
using Models.Core;
using System.Collections.Generic;
using System.Text;
using Models.PMF;
using Models;
using System.Xml.Serialization;
using APSIM.Shared.Utilities;
using Models.Functions;

namespace Models
{
    [Serializable] 
    public class Script : Model
    {
        [Link] private Plant Slurp;
        [Link] private Clock Clock;
        [Link] private Zone zone;
        [Link(Type = LinkType.Path, Path = "[Slurp].Root")]
        private Root root;

        [Description("Use extra root zone")]
        public bool UseExtraZone { get; set; }

        
        [EventSubscribe("StartOfSimulation")]
        private void OnSimulationCommencing(object sender, EventArgs e)
        {
            if (UseExtraZone)
            {
            root.ZoneNamesToGrowRootsIn.Add("Row");
            root.ZoneRootDepths.Add(600);
BiomassDemand InitialDM = new BiomassDemand();
Constant InitStruct = new Constant();
InitStruct.FixedValue = 10;
InitialDM.Structural = InitStruct;
Constant InitMetab = new Constant();
InitMetab.FixedValue = 0;
InitialDM.Metabolic = InitMetab;
Constant InitStor = new Constant();
InitStor.FixedValue = 0;
InitialDM.Storage = InitStor;
            root.ZoneInitialDM.Add(InitialDM);

            }
        }
    }
}
```
        Soil: Latitude=0; Longitude=0
          LayerStructure: Thickness=[200, 200, 200, 200, 200, 200, 400, 400, 400, 600]
          Chemical: same as BaseSim.BaseSim.Row.Soil.Chemical
          InitialWater Initial water: PercentMethod=1; FractionFull=1.00166; RelativeTo=LL15
          WaterBalance SoilWater: same as BaseSim.BaseSim.Row.Soil.SoilWater
          SoilNitrogen: same as BaseSim.BaseSim.Row.Soil.SoilNitrogen
          Organic: same as BaseSim.BaseSim.Row.Soil.Organic
          CERESSoilTemperature Temperature
          OutputLayers: Thickness=[150, 150, 150, 150, 150, 150, 150]
          Physical: same as BaseSim.BaseSim.Row.Soil.Physical
        Operations WinterRainfall
          2002-05-28  [Irrigation].Apply(200);
        Manager PlantVariables
```csharp
using Models.Core;
using System;

namespace Models
{
    [Serializable]
    public class Script : Model
    {
        
    }
}
```
  Folder Validation
    Folder Sauvignonblanc
      Experiment RetainedNodeNum
        Factors
          Factor Node: Specification=[TreeInitialisation].Script.BudNumber = 24, 36, 48, 60, 72
        Simulation RetainedNodNum
          Clock: Start=2005-02-25; End=2012-05-02
          Summary SummaryFile
          Weather: FileName=Blenheim.met
          MicroClimate: a_interception=0; b_interception=1; c_interception=0; d_interception=0; soil_albedo=0.3; SoilHeatFluxFraction=0.4; MinimumHeightDiffForNewLayer=0; NightInterceptionFraction=0.5; ReferenceHeight=2
          SoilArbitrator Soil Arbitrator
          RectangularZone Row: Length=100; Width=0.9; Slope=0; AspectAngle=0; Altitude=50
            Report: EventNames=[Clock].DoReport
            Memo: same as BaseSim.BaseSim.Row.Memo
            Plant Grapevine
            Manager TreeInitialisation
              CultivarName = SauvignonBlanc
              SowingDate = 02/25/2005 00:00:00
              VineDistance = 1.8
              BudNumber = 48
              CordonNumber = 4
              CordonDiameter = 10
              CordonLength = 0.9
              TrunkDiameter = 40
              TrunkLength = 0.8
              RootTrunkRatio = 1
              RootNSC = 0.2
              TrunkNSC = 0.2
              CordonNSC = 0.2
              StartAge = 3
```csharp
using Models.PMF.Phen;
using Models.Zones;
using Models.Soils;
using APSIM.Shared.Utilities;
using Models.PMF;
using Models.Core;
using System;
using Models.PMF.Struct;
        
namespace Models
{
    [Serializable] 
    [System.Xml.Serialization.XmlInclude(typeof(Model))]
    public class Script : Model
    {
        [Link] private Plant Grapevine;
        [Link] private Clock Clock;
        [Link] private Soil Soil;
        [Link] private Zone zone;
        [Link]
        private Structure structure;
        [Link]
        private Phenology phenology;

        [Display(Type = DisplayType.CultivarName)]
        [Description("Plant Type")]
        public string CultivarName { get; set; }

        [Description("Initialisation Date")]
        public DateTime SowingDate { get; set; }

        [Description("Vine distance(m)")]
        public double VineDistance { get; set; }
        //number of buds lay down in cane and spur. there is a function inside to calculate the number of buds per vine based on bud burst and from cane head
        [Description("Bud number(#)")]
        public double BudNumber { get; set; }
        //cordon or spur biomass
        [Description("Cordon number(#)")]
        public double CordonNumber { get; set; }
      
        [Description("Cordon diameter(mm)")]
        public double CordonDiameter { get; set; }

        [Description("Cordon length(m)")]
        public double CordonLength { get; set; }
        //trunk information
        [Description("Trunk diameter(mm)")]
        public double TrunkDiameter { get; set; }

        [Description("Trunk length(m)")]
        public double TrunkLength { get; set; }
        //root dry matter
        [Description("Fibrous root trunk ratio")]
        public double RootTrunkRatio { get; set; }
             
        //total nonstructural fraction in dry matter 
        [Description("Fibrous root nonstructural carbon fraction")]
        public double RootNSC { get; set; }

        [Description("Trunk nonstructural carbon fraction")]
        public double TrunkNSC { get; set; }

        [Description("Cordon nonstructural carbon fraction")]
        public double CordonNSC { get; set; }

        [Description("Age of trees (in Years) at start of simulation)")]
        public int StartAge {get;set;}

        private RectangularZone RowZone {get; set;}

        [EventSubscribe("DoManagement")]
        private void OnDoManagement(object sender, EventArgs e)
        {
            if (Clock.Today.Date == SowingDate)
            {
                RowZone = this.Parent.Parent.Parent.FindInScope("Row") as RectangularZone;
                double pop = 1/RowZone.Width/VineDistance;  
                //sowing method
                Grapevine.Sow(cultivar: CultivarName,population: pop, 
                depth: 2000, rowSpacing: RowZone.Width, budNumber:BudNumber);
                double budsPerMeterRow = BudNumber/VineDistance; 
                zone.Set("[Grapevine].Structure.BudsPerMeterRow.FixedValue", budsPerMeterRow); 
                //cordon biomass
                //calculate the biomass by length 1 meter time number of cordons time wood density (0.5 g/mm2/m) * pop to covert the biomass into g/m2
                double woodDensity = 0.4; //g/mm2/m
                double CordonNumber = BudNumber/12; //recalculating cordon number as we 
                double cordonBiomass = 3.1415926*(CordonDiameter/2)*(CordonDiameter/2)*CordonLength*CordonNumber *woodDensity * pop; 
                double cordonNSC = cordonBiomass * CordonNSC;
                zone.Set("[Grapevine].Cordon.CordonDiameter.FixedValue", CordonDiameter);
                zone.Set("[Grapevine].Cordon.CordonLength.FixedValue", CordonLength);
                zone.Set("[Grapevine].Cordon.CordonNumber.FixedValue", CordonNumber);

                zone.Set("[Grapevine].Cordon.Live.StorageWt", cordonNSC);                
                zone.Set("[Grapevine].Cordon.Live.StructuralWt", cordonBiomass - cordonNSC);                

                //trunk biomass
                double trunkDensity = 0.5; //g/mm2/m
                double trunkBiomass = 3.1415926*(TrunkDiameter/2)*(TrunkDiameter/2)*TrunkLength *trunkDensity * pop; 
                double trunkNSC = trunkBiomass * TrunkNSC;

                zone.Set("[Grapevine].Trunk.TrunkDiameter.FixedValue", TrunkDiameter);
                zone.Set("[Grapevine].Trunk.TrunkLength.FixedValue", TrunkLength);

                zone.Set("[Grapevine].Trunk.Live.StorageWt", trunkNSC); 
                zone.Set("[Grapevine].Trunk.Live.StructuralWt", trunkBiomass - trunkNSC);              
                

                //Fibrous Root biomass is  per plant
                double rootBiomass = RootTrunkRatio * trunkBiomass; 
                double rootNSC = rootBiomass * RootNSC; 
                // zone.Set("[Grapevine].Fibrousroot.DMDemands.Structural.RootTrunkRatio",  RootTrunkRatio); 
                
                 zone.Set("[Grapevine].Fibrousroot.Live.StorageWt",    rootNSC ); //rootNSC*pop
                 zone.Set("[Grapevine].Fibrousroot.Live.StructuralWt", rootBiomass - rootNSC); 

                object StartAgeValue = StartAge;
                zone.Set("[Grapevine].Phenology.Age.Years",StartAgeValue);


            }
        }
    }
}
```
            Irrigation
            Fertiliser
            SurfaceOrganicMatter: InitialResidueName=wheat_stubble; InitialResidueType=wheat; InitialResidueMass=10000; InitialStandingFraction=0; InitialCPR=0; InitialCNR=20
            Manager SetupTreeRootZones
              UseExtraZone = True
              script: same as in BaseSim.BaseSim.Row.SetupTreeRootZones
            Operations VineIrrigation
            Operations WinterRainfall
              2006-08-26  [Irrigation].Apply(45);
            Manager PlantVariables
              FRadInt = 0
              ET = 0
              ES = 0
              PET = 0
              LAI = 0
              LAIPerVine = 0
              Height = 0
              RootDepth = 0
              PlantWidth = 0
```csharp
using Models.PMF.Organs;
using Models.Zones;
using APSIM.Shared.Utilities;
using Models.Soils;
using System.Collections.Generic;
using Models.PMF;
using Models.Core;
using System;
using Models.Climate;

namespace Models
{
    [Serializable]
    public class Script : Model
    {
        [Link] private Weather weather;
        [Link(Type = LinkType.Path, Path = "[Grapevine].Root")]
        private Root root;
        private RectangularZone AlleyZone {get; set; }
        private RectangularZone RowZone {get; set;}
        private RectangularZone ThisZone {get; set;}
        private double AreaWidth {get; set;}

        public double FRadInt {get; set;}
        public double ET {get; set;}
        public double ES {get; set;}
        public double PET {get; set;}
        public double LAI {get; set;}
        public double LAIPerVine {get; set;}
        public double Height {get; set;}
        public double RootDepth {get; set;}
        public double PlantWidth {get; set;}

        [EventSubscribe("StartOfSimulation")]
        private void DoStartOfSimulation(object sender, EventArgs e)
        {
               
               ThisZone = this.Parent.Parent as RectangularZone;
               RowZone = this.Parent.Parent.Parent.FindInScope("Row") as RectangularZone;
               AlleyZone = (RectangularZone)this.Parent.Parent.Parent.FindInScope("Alley") as RectangularZone;
               AreaWidth = AlleyZone.Width + RowZone.Width;
               PlantWidth = 0;
        }
        
        [EventSubscribe("DoReportCalculations")]
        private void OnDoReportCalculations(object sender, EventArgs e)
        {
            if (ThisZone.Name == "Row")
                {
                FRadInt = ((double)RowZone.Get("Grapevine.Leaf.RadIntTot") * RowZone.Width)/(weather.Radn * AreaWidth);
                ET = (double)RowZone.Get("Grapevine.Leaf.Transpiration") * RowZone.Width/AreaWidth;
                LAI = (double)RowZone.Get("Grapevine.Leaf.LAI");
                LAIPerVine =  LAI*RowZone.Width*1.8;
                //TreeInitialisation.Script.VineDistance;
                //(double)RowZone.Get("Grapevine.Leaf.LAI");
                Height = (double)RowZone.Get("Grapevine.Leaf.Height");
                RootDepth = (double)RowZone.Get("Grapevine.Root.Depth");
                PlantWidth = (double)RowZone.Get("Grapevine.Leaf.Width");
                }
            else
                {
                FRadInt = ((double)AlleyZone.Get("Slurp.Leaf.RadIntTot") * ThisZone.Width)/ (weather.Radn * AreaWidth);
                ET = (double)AlleyZone.Get("Slurp.Leaf.Transpiration") * ThisZone.Width/AreaWidth;
                LAI = (double)AlleyZone.Get("Slurp.Leaf.LAI");
                Height = (double)AlleyZone.Get("Slurp.Leaf.Height");
                RootDepth = (double)AlleyZone.Get("Slurp.Root.Depth");
                }

            ES = (double)ThisZone.Get("Soil.SoilWater.Es") * ThisZone.Width/AreaWidth;
            double PETWidth = Math.Min(Math.Max(PlantWidth,ThisZone.Width),AreaWidth);
            PET = (double)ThisZone.Get("Soil.SoilWater.Eo") * PETWidth/AreaWidth;
        }
    }
}
```
            Manager HarvestNPruning
              LeafPluckingDAWS = 205
              HarvestDAWS = 305
              PruningDAWS = 341
              FrostDate1 = 10/03/2002 00:00:00
              FrostDate2 = 11/18/2002 00:00:00
```csharp
using Models.PMF.Phen;
using Models.PMF.Organs;
using System.Xml.Serialization;
using Models.PMF.Interfaces;
using Models.PMF;
using Models.Core;
using System.Collections.Generic;
using System;
using Models.Climate;
using Models.PMF.Struct;

namespace Models
{
    [Serializable] 
    [System.Xml.Serialization.XmlInclude(typeof(Model))]
    public class Script : Model
    {
        [Link] private Plant Grapevine;
        [Link] private Clock Clock;
        [Link] private Zone zone;
        [Link] private Weather weather;
        [Link]
        private Root root;
        [Link(Type = LinkType.Path, Path = "[Grapevine].Structure")]
        private Structure structure;
        [Link(Type = LinkType.Path, Path = "[Grapevine].Phenology")]
        private Phenology phenology;
       
        [Description("SummerPruning_DAWS")]         
        public int LeafPluckingDAWS { get; set; }  //day

        [Description("Harvest_DAWS")]
        public int HarvestDAWS { get; set; }

        [Description("Pruning_DAWS")]         
        public int PruningDAWS { get; set; }  //day

        [Description("Frost Date 1")]
        public DateTime FrostDate1 { get; set; }
        [Description("Frost Date 2")]
        public DateTime FrostDate2 { get; set; }


        [XmlIgnore] private RemovalFractions Remove_1 { get; set; }
        [XmlIgnore] private RemovalFractions Remove_2 { get; set; }
        [XmlIgnore] private RemovalFractions Remove_3 { get; set; }
        [XmlIgnore] private RemovalFractions Remove_4 { get; set; }
        [XmlIgnore] private RemovalFractions Remove_5 { get; set; }
        [EventSubscribe("StartOfSimulation")]
        private void OnSimulationCommencing(object sender, EventArgs e)
        {
            Remove_1 = new RemovalFractions();
            Remove_2 = new RemovalFractions();
            Remove_3 = new RemovalFractions();
            Remove_4 = new RemovalFractions();
            Remove_5 = new RemovalFractions();
            zone.Set("[Grapevine].Phenology.AccChillBefPrune.LessThanFunction.PruningTime.FixedValue", PruningDAWS);
        }
        
        [EventSubscribe("DoManagement")]
        private void OnDoManagement(object sender, EventArgs e)
        {
             //Set up  array of remove fractions to send with Cut method.  Each member in the array corresponds to an organ in the same order they are set up in.
             //PruneDate = DateTime.Parse(PruneDateString);
             if (weather.DaysSinceWinterSolstice == LeafPluckingDAWS && phenology.Stage >= 3)
             {
                //int TargetLeafRank = 20;    
                //int LeafTipsAppeared = 25;//(int)structure.LeafTipsAppeared;

                //int NodesToRemove = (int)Math.Max(LeafTipsAppeared - TargetLeafRank, 1); 
                double FractionToRemove = 0.2;//1- TargetLeafRank/LeafTipsAppeared;
            
                Remove_1.SetFractionToRemove("Leaf", 0, "live");
                Remove_1.SetFractionToRemove("Shoot", 0);
                Remove_1.SetFractionToRemove("Cordon", 0);
                Remove_1.SetFractionToRemove("Trunk", 0);
                Remove_1.SetFractionToRemove("Root", 0);
                Remove_1.SetFractionToRemove("Fibrousroot", 0);
                Remove_1.SetFractionToRemove("Berry", 0);
            
                Remove_1.SetFractionToResidue("Leaf", FractionToRemove, "live");
                Remove_1.SetFractionToResidue("Shoot", FractionToRemove);
                Remove_1.SetFractionToResidue("Cordon", 0);
                Remove_1.SetFractionToResidue("Trunk", 0);
                Remove_1.SetFractionToResidue("Root", 0);
                Remove_1.SetFractionToRemove("Fibrousroot", 0);
                Remove_1.SetFractionToResidue("Berry", 0);
            
               // Remove_1.NodesToRemove = NodesToRemove;
                Grapevine.RemoveBiomass("LeafPluck", Remove_1);
        
             }

           if (weather.DaysSinceWinterSolstice == HarvestDAWS && phenology.Stage >= 3)
           {
               
               Remove_2.SetFractionToRemove("Leaf", 0, "live");
               Remove_2.SetFractionToRemove("Shoot",  0);
               Remove_2.SetFractionToRemove("Cordon", 0);
               Remove_2.SetFractionToRemove("Trunk",  0);
               Remove_2.SetFractionToRemove("Root",   0);
               Remove_2.SetFractionToRemove("Fibrousroot", 0);
               Remove_2.SetFractionToRemove("Berry",  1);
         
               Remove_2.SetFractionToResidue("Leaf",   0.1, "live");
               Remove_2.SetFractionToResidue("Shoot",  0);
               Remove_2.SetFractionToResidue("Cordon", 0);
               Remove_2.SetFractionToResidue("Trunk",  0);
               Remove_2.SetFractionToResidue("Root",   0);
               Remove_2.SetFractionToRemove("Fibrousroot", 0);
               Remove_2.SetFractionToResidue("Berry",  0);
         
               Grapevine.RemoveBiomass("LeafPluck", Remove_2);
           }
                                   
            if (weather.DaysSinceWinterSolstice == PruningDAWS&& phenology.Stage >= 3)
            {
                Remove_3.SetPhenologyStage = 1;

                Remove_3.SetFractionToRemove("Leaf",   0, "live");
                Remove_3.SetFractionToRemove("Shoot",  0);
                Remove_3.SetFractionToRemove("Cordon", 0);
                Remove_3.SetFractionToRemove("Trunk",  0);
                Remove_3.SetFractionToRemove("Root",   0);
                Remove_3.SetFractionToRemove("Berry",  0);

                Remove_3.SetFractionToResidue("Leaf",   1, "live");
                Remove_3.SetFractionToResidue("Shoot",  1);
                Remove_3.SetFractionToResidue("Cordon", 1);
                Remove_3.SetFractionToResidue("Trunk",  0);
                Remove_3.SetFractionToResidue("Root",   0);
                Remove_3.SetFractionToRemove("Fibrousroot", 0);
                Remove_3.SetFractionToResidue("Berry",  1);

                Grapevine.RemoveBiomass("Prune", Remove_3);

                double budNumber = (double)zone.Get("Grapevine.Structure.BudsPerMeterRow.FixedValue"); 
                double cordonNum = budNumber*1.8/12;
                double cordonBiomass = 17.5 * cordonNum; //g/m2 reset the cordon biomass to the original value 
                double cordonNSC = cordonBiomass * 0.18;

                zone.Set("[Grapevine].Cordon.Live.StorageWt", cordonNSC);                
                zone.Set("[Grapevine].Cordon.Live.StructuralWt", cordonBiomass - cordonNSC); 
                zone.Set("[Grapevine].Phenology.AccChillBefPrune.LessThanFunction.PruningTime.FixedValue",PruningDAWS); 
                //zone.Set("[Grapevine].Trunk.Live.StructuralWt", 280);     
               // zone.Set("[Grapevine].Trunk.Live.StorageWt", 70);     

               // zone.Set("[Grapevine].Root.Live.StructuralWt", 1531);     
               // zone.Set("[Grapevine].Root.Live.StorageWt",  349);     

            }
           if (Clock.Today.Date == FrostDate1)      
           {
              Remove_4.SetFractionToRemove("Leaf", 0, "live");
              Remove_4.SetFractionToRemove("Shoot",  0);
              Remove_4.SetFractionToRemove("Cordon", 0);
              Remove_4.SetFractionToRemove("Trunk",  0);
              Remove_4.SetFractionToRemove("Root",   0);
              Remove_4.SetFractionToRemove("Fibrousroot", 0);
              Remove_4.SetFractionToRemove("Berry",  0);
           //
              Remove_4.SetFractionToResidue("Leaf",   0.2, "live");
              Remove_4.SetFractionToResidue("Shoot",  0);
              Remove_4.SetFractionToResidue("Cordon", 0);
              Remove_4.SetFractionToResidue("Trunk",  0);
              Remove_4.SetFractionToResidue("Root",   0);
              Remove_4.SetFractionToRemove("Fibrousroot", 0);
              Remove_4.SetFractionToResidue("Berry",  0);
           //
              Grapevine.RemoveBiomass("LeafPluck", Remove_4);
              //zone.Set("[Grapevine].Structure.FinalLeafNumber.FixedValue", 28); 
           //
           }  

           if (Clock.Today.Date == FrostDate2)      
           {
              Remove_5.SetFractionToRemove("Leaf", 0, "live");
              Remove_5.SetFractionToRemove("Shoot",  0);
              Remove_5.SetFractionToRemove("Cordon", 0);
              Remove_5.SetFractionToRemove("Trunk",  0);
              Remove_5.SetFractionToRemove("Root",   0);
              Remove_5.SetFractionToRemove("Fibrousroot", 0);
              Remove_5.SetFractionToRemove("Berry",  0);
           //
              Remove_5.SetFractionToResidue("Leaf",   0.2, "live");
              Remove_5.SetFractionToResidue("Shoot",  0);
              Remove_5.SetFractionToResidue("Cordon", 0);
              Remove_5.SetFractionToResidue("Trunk",  0);
              Remove_5.SetFractionToResidue("Root",   0);
              Remove_5.SetFractionToRemove("Fibrousroot", 0);
              Remove_5.SetFractionToResidue("Berry",  0);
           //
              Grapevine.RemoveBiomass("LeafPluck", Remove_5);
           //
           }  

        }
    }
}
```
            Manager DripIrrigator
              FertilizeDAWS = 100
              Amount = 400
              totalIrrigation = 0
              script: same as in BaseSim.BaseSim.Row.DripIrrigator
            Soil: Latitude=0; Longitude=0
              LayerStructure: Thickness=[200, 200, 200, 200, 200, 200, 400, 400, 400, 600]
              Chemical
                Thickness  NO3N     NH4N  PH
                100        217      0     6.6
                200        15       0     6.2
                300        1.66667  0     5.7
                300        1.66667  0     5.5
                300        0        0     5.5
                300        0        0     5.5
              WaterBalance SoilWater: SummerDate=1-Nov; SummerU=9; SummerCona=4.4; WinterDate=1-Apr; WinterU=9; WinterCona=4.4; DiffusConst=88; DiffusSlope=35.4; Salb=0.18; CN2Bare=68; CNRed=20; CNCov=0.8; Slope=0; DischargeWidth=0; CatchmentArea=0
                Thickness  SWCON  KLAT
                150        0.55   0
                150        0.55   0
                100        0.55   0
                200        0.55   0
                200        0.55   0
                200        0.55   0
                200        0.55   0
                200        0.55   0
                200        0.55   0
                200        0.55   0
                200        0.55   0
                200        0.55   0
                400        0.55   0
              Physical
                Thickness  BD  AirDry  LL15  DUL   SAT
                300        1   0.3     0.3   0.5   0.6
                300        1   0.32    0.32  0.5   0.6
                300        1   0.18    0.18  0.35  0.5
                300        1   0.05    0.05  0.1   0.3
                1950       1   0.05    0.05  0.1   0.3
                SoilCrop GrapevineSoil: LL=[0.3, 0.32, 0.18, 0.05, 0.05]; KL=[0.1, 0.01, 0.05, 0.005, 0]; XF=[1, 1, 1, 1, 1]
                SoilCrop SlurpSoil: LL=[0.3, 0.32, 0.18, 0.05, 0.05]; KL=[0.11, 0.11, 0.11, 0.11, 0.11]; XF=[1, 1, 1, 1, 1]
              SoilNitrogen: same as BaseSim.BaseSim.Row.Soil.SoilNitrogen
              Organic: FOMCNRatio=30
                Thickness  Carbon  SoilCNRatio  FBiom  FInert  FOM
                100        5       11.5         0.025  0.3     1243.93
                200        4       11.5         0.025  0.4     833.832
                300        2       11.5         0.015  0.75    457.617
                300        1.03    11.5         0.01   0.9     251.145
                300        0.47    11.5         0.01   0.96    137.831
                300        0.47    11.5         0.01   0.96    75.6435
              Sample Initial nitrogen: Thickness=[100, 200, 300, 300, 300, 300]; SWUnits=Volumetric; OCUnits=Total; PHUnits=Water
              CERESSoilTemperature Temperature
              OutputLayers: Thickness=[300, 300, 300]
              InitialWater: PercentMethod=0; FractionFull=1
          RectangularZone Alley: Length=100; Width=1.9; Slope=0; AspectAngle=0; Altitude=50
            SurfaceOrganicMatter: InitialResidueName=wheat_stubble; InitialResidueType=wheat; InitialResidueMass=500; InitialStandingFraction=0; InitialCPR=0; InitialCNR=100
            Plant Slurp
            Fertiliser
            Irrigation
            Manager PastureInitialisation
              CultivarName = StaticCrop
              InitialRootDepth = 2000
              SowingDate = 02/25/2005 00:00:00
              RootDepth = 2000
              RFV = 10
              KLReductionFactor = -0.001
              KLReductionDepth = 150
              YKLModifiers =
              XDepth =
              MaxG = 0.004
              R50 = 150
```csharp
using Models.Interfaces;
using Models.Soils;
using APSIM.Shared.Utilities;
using Models.PMF;
using Models.Core;
using System;
using Models.PMF.Organs;
        
namespace Models
{
    [Serializable] 
    [System.Xml.Serialization.XmlInclude(typeof(Model))]
    public class Script : Model
    {
        [Link] private Plant Slurp;
        [Link] private Clock Clock;
        [Link] private Soil Soil;
        [Link] private Zone zone;
        [Link(Type = LinkType.Path, Path = "[Slurp].Root")]
        private Root root;
        [Link]
        private IPhysical soilPhysical;

        [Display(Type = DisplayType.CultivarName)]
        [Description("Plant Type")]
        public string CultivarName { get; set; }
        [Description("Initial Root Depth")]
        public double InitialRootDepth { get; set; }
        [Description("Initialisation Date")]
        public DateTime SowingDate { get; set; }
        [Description("Maximum Root Depth")]
        public double RootDepth { get; set; }
        [Description("Roof Front Velocity")]
        public double RFV { get; set; }
        [Description("Factor to change Kl modifier with Depth")]
        public double KLReductionFactor { get; set; }
        [Description("Depth that KL starts to decline")]
        public double KLReductionDepth { get; set; }
        
        public double[] YKLModifiers { get; set; }
        public double[] XDepth { get; set; }
        private double Depth { get; set; }
        
        [Description("Maximum Stomatal Conductance")]
        public double MaxG { get; set; }
        [Description("Stomatal Radn response")]
        public double R50 { get; set; }
        
        [EventSubscribe("DoManagement")]
        private void OnDoManagement(object sender, EventArgs e)
        {
            if (Clock.Today.Date == SowingDate)
            {
                Slurp.Sow(cultivar: CultivarName, population: 1, depth: InitialRootDepth, rowSpacing: 150);
                
                YKLModifiers = new double[soilPhysical.Thickness.Length];
                XDepth = new double[soilPhysical.Thickness.Length];
                Depth = 0;
                for (int layer = 0; layer < soilPhysical.Thickness.Length; layer++)
                {
                    Depth += soilPhysical.Thickness[layer] / 2;  //Add half of the thickness of the current layer so depth is the mid depth of that layer
                    if (Depth <= KLReductionDepth)
                    {
                        YKLModifiers[layer] = 1;
                        XDepth[layer] = Depth;
                    }
                    else
                    {
                        double KLMod = 1 * Math.Exp(-KLReductionFactor * (Depth - KLReductionDepth));
                        YKLModifiers[layer] = KLMod;
                        XDepth[layer] = Depth;
                    }
                    Depth += soilPhysical.Thickness[layer] / 2;  //Add the other half of the current layer so depth is the top of the next layer
                }
                object KLMods = YKLModifiers;
                zone.Set("Slurp.Root.KLModifier.XYPairs.Y", KLMods);
                object Depths = XDepth;
                zone.Set("Slurp.Root.KLModifier.XYPairs.X", Depths);
                object RD = RootDepth;
                zone.Set("Slurp.Root.MaximumRootDepth.FixedValue", RD);
                object RV = RFV;
                zone.Set("Slurp.Root.RootFrontVelocity.Potential.FixedValue", RV);
                object GMaxValue = MaxG;
                zone.Set("Slurp.Leaf.Gsmax350", GMaxValue); 
                object R50Value = R50; 
                zone.Set("Slurp.Leaf.R50", R50Value); 
                
            }
        }
    }
}
```
            Manager SetPastureVariables
              Ext_coef = 0.6
              MaximumHeight = 300
              MinimumHeight = 100
              Cover = 0
              LAI = 0
              script: same as in BaseSim.BaseSim.Alley.SetPastureVariables
            Manager SetupPastureRootZones
              UseExtraZone = True
              script: same as in BaseSim.BaseSim.Alley.SetupPastureRootZones
            Operations WinterRainfall
              2006-08-26  [Irrigation].Apply(45);
            Manager PlantVariables
              FRadInt = 0
              ET = 0
              ES = 0
              PET = 0
              LAI = 0
              Height = 0
              RootDepth = 0
              PlantWidth = 0
```csharp
using Models.PMF.Organs;
using Models.Zones;
using APSIM.Shared.Utilities;
using Models.Soils;
using System.Collections.Generic;
using Models.PMF;
using Models.Core;
using System;
using Models.Climate;

namespace Models
{
    [Serializable]
    public class Script : Model
    {
        [Link] private Weather weather;
        [Link]
        private Root root;
        private RectangularZone AlleyZone {get; set; }
        private RectangularZone RowZone {get; set;}
        private RectangularZone ThisZone {get; set;}
        private double AreaWidth {get; set;}

        public double FRadInt {get; set;}
        public double ET {get; set;}
        public double ES {get; set;}
        public double PET {get; set;}
        public double LAI {get; set;}
        public double Height {get; set;}
        public double RootDepth {get; set;}
        public double PlantWidth {get; set;}

        [EventSubscribe("StartOfSimulation")]
        private void DoStartOfSimulation(object sender, EventArgs e)
        {
               
               ThisZone = this.Parent.Parent as RectangularZone;
               RowZone = this.Parent.Parent.Parent.FindInScope("Row") as RectangularZone;
               AlleyZone = (RectangularZone)this.Parent.Parent.Parent.FindInScope("Alley") as RectangularZone;
               AreaWidth = AlleyZone.Width + RowZone.Width;
               PlantWidth = 0;
        }
        
        [EventSubscribe("DoReportCalculations")]
        private void OnDoReportCalculations(object sender, EventArgs e)
        {
            if (ThisZone.Name == "Row")
                {
                FRadInt = ((double)RowZone.Get("Grapevine.Leaf.RadIntTot") * RowZone.Width)/(weather.Radn * AreaWidth);
                ET = (double)RowZone.Get("Grapevine.Leaf.Transpiration") * RowZone.Width/AreaWidth;
                LAI = (double)RowZone.Get("Grapevine.Leaf.LAI");
                Height = (double)RowZone.Get("Grapevine.Leaf.Height");
                RootDepth = (double)RowZone.Get("Grapevine.Root.Depth");
                PlantWidth = (double)RowZone.Get("Grapevine.Leaf.Width");
                }
            else
                {
                FRadInt = ((double)AlleyZone.Get("Slurp.Leaf.RadIntTot") * ThisZone.Width)/ (weather.Radn * AreaWidth);
                ET = (double)AlleyZone.Get("Slurp.Leaf.Transpiration") * ThisZone.Width/AreaWidth;
                LAI = (double)AlleyZone.Get("Slurp.Leaf.LAI");
                Height = (double)AlleyZone.Get("Slurp.Leaf.Height");
                RootDepth = (double)AlleyZone.Get("Slurp.Root.Depth");
                }

            ES = (double)ThisZone.Get("Soil.SoilWater.Es") * ThisZone.Width/AreaWidth;
            double PETWidth = Math.Min(Math.Max(PlantWidth,ThisZone.Width),AreaWidth);
            PET = (double)ThisZone.Get("Soil.SoilWater.Eo") * PETWidth/AreaWidth;
        }
    }
}
```
            Soil: Latitude=0; Longitude=0
              LayerStructure: Thickness=[200, 200, 200, 200, 200, 200, 400, 400, 400, 600]
              Chemical: same as Validation.Sauvignonblanc.RetainedNodeNum.RetainedNodNum.Row.Soil.Chemical
              WaterBalance SoilWater: same as Validation.Sauvignonblanc.RetainedNodeNum.RetainedNodNum.Row.Soil.SoilWater
              SoilNitrogen: same as BaseSim.BaseSim.Row.Soil.SoilNitrogen
              Organic: same as BaseSim.BaseSim.Row.Soil.Organic
              CERESSoilTemperature Temperature
              OutputLayers: Thickness=[300, 300, 300]
              InitialWater: PercentMethod=1; FractionFull=0.79
              Physical: same as Validation.Sauvignonblanc.RetainedNodeNum.RetainedNodNum.Row.Soil.Physical
            Report ReportAlley: same as BaseSim.BaseSim.Alley.ReportAlley
      Experiment Marlborough_4Cane
        Factors
          Factor Climate
            Specification=[Weather].FileName = Site1001_BRA.met,Site1002_OYB.met,Site1003_SEA.met,Site1004_RPC.met
        Simulation VineFacts2
          Weather: FileName=Site1003_SEA.met
          Clock: Start=2003-02-25; End=2020-05-01
          Summary
          SoilArbitrator Soil Arbitrator
          MicroClimate: a_interception=0; b_interception=1; c_interception=0; d_interception=0; soil_albedo=0.23; SoilHeatFluxFraction=0.4; MinimumHeightDiffForNewLayer=0; NightInterceptionFraction=0.5; ReferenceHeight=2
          RectangularZone Row: Length=100; Width=0.9; Slope=0; AspectAngle=0; Altitude=50
            Report: EventNames=[Clock].DoReport
            Memo: same as BaseSim.BaseSim.Row.Memo
            Plant Grapevine
            Manager TreeInitialisation
              CultivarName = SauvignonBlanc
              SowingDate = 02/25/2003 00:00:00
              VineDistance = 1.8
              BudNumber = 40
              CordonNumber = 4
              CordonDiameter = 10
              CordonLength = 0.9
              TrunkDiameter = 65
              TrunkLength = 0.8
              RootTrunkRatio = 1
              RootNSC = 0.2
              TrunkNSC = 0.2
              CordonNSC = 0.2
              StartAge = 8
              script: same as in Validation.Sauvignonblanc.RetainedNodeNum.RetainedNodNum.Row.TreeInitialisation
            Irrigation
            Fertiliser
            SurfaceOrganicMatter: InitialResidueName=wheat_stubble; InitialResidueType=wheat; InitialResidueMass=500; InitialStandingFraction=0; InitialCPR=0; InitialCNR=100
            Soil: same as BaseSim.BaseSim.Row.Soil
            Manager SetupTreeRootZones: same as Validation.Sauvignonblanc.RetainedNodeNum.RetainedNodNum.Row.SetupTreeRootZones
            Operations VineIrrigation
            Operations WinterRainfall
              2002-05-28  [Irrigation].Apply(200);
            Manager PlantVariables
              FRadInt = 0
              ET = 0
              ES = 0
              PET = 0
              LAI = 0
              Height = 0
              RootDepth = 0
              PlantWidth = 0
```csharp
using Models.PMF.Organs;
using Models.Zones;
using APSIM.Shared.Utilities;
using Models.Soils;
using System.Collections.Generic;
using Models.PMF;
using Models.Core;
using System;
using Models.Climate;

namespace Models
{
    [Serializable]
    public class Script : Model
    {
        [Link] private Weather weather;
        [Link(Type = LinkType.Path, Path = "[Grapevine].Root")]
        private Root root;
        private RectangularZone AlleyZone {get; set; }
        private RectangularZone RowZone {get; set;}
        private RectangularZone ThisZone {get; set;}
        private double AreaWidth {get; set;}

        public double FRadInt {get; set;}
        public double ET {get; set;}
        public double ES {get; set;}
        public double PET {get; set;}
        public double LAI {get; set;}
        public double Height {get; set;}
        public double RootDepth {get; set;}
        public double PlantWidth {get; set;}

        [EventSubscribe("StartOfSimulation")]
        private void DoStartOfSimulation(object sender, EventArgs e)
        {
               
               ThisZone = this.Parent.Parent as RectangularZone;
               RowZone = this.Parent.Parent.Parent.FindInScope("Row") as RectangularZone;
               AlleyZone = (RectangularZone)this.Parent.Parent.Parent.FindInScope("Alley") as RectangularZone;
               AreaWidth = AlleyZone.Width + RowZone.Width;
               PlantWidth = 0;
        }
        
        [EventSubscribe("DoReportCalculations")]
        private void OnDoReportCalculations(object sender, EventArgs e)
        {
            if (ThisZone.Name == "Row")
                {
                FRadInt = ((double)RowZone.Get("Grapevine.Leaf.RadIntTot") * RowZone.Width)/(weather.Radn * AreaWidth);
                ET = (double)RowZone.Get("Grapevine.Leaf.Transpiration") * RowZone.Width/AreaWidth;
                LAI = (double)RowZone.Get("Grapevine.Leaf.LAI");
                //LAIPerVine =  LAI*RowZone.Width*1.8;
                //TreeInitialisation.Script.VineDistance;
                //(double)RowZone.Get("Grapevine.Leaf.LAI");
                Height = (double)RowZone.Get("Grapevine.Leaf.Height");
                RootDepth = (double)RowZone.Get("Grapevine.Root.Depth");
                PlantWidth = (double)RowZone.Get("Grapevine.Leaf.Width");
                }
            else
                {
                FRadInt = ((double)AlleyZone.Get("Slurp.Leaf.RadIntTot") * ThisZone.Width)/ (weather.Radn * AreaWidth);
                ET = (double)AlleyZone.Get("Slurp.Leaf.Transpiration") * ThisZone.Width/AreaWidth;
                LAI = (double)AlleyZone.Get("Slurp.Leaf.LAI");
                Height = (double)AlleyZone.Get("Slurp.Leaf.Height");
                RootDepth = (double)AlleyZone.Get("Slurp.Root.Depth");
                }

            ES = (double)ThisZone.Get("Soil.SoilWater.Es") * ThisZone.Width/AreaWidth;
            double PETWidth = Math.Min(Math.Max(PlantWidth,ThisZone.Width),AreaWidth);
            PET = (double)ThisZone.Get("Soil.SoilWater.Eo") * PETWidth/AreaWidth;
        }
    }
}
```
            Manager DripIrrigator
              FertilizeDAWS = 100
              Amount = 20
              totalIrrigation = 0
              script: same as in BaseSim.BaseSim.Row.DripIrrigator
            Manager HarvestNPruning: same as Validation.Sauvignonblanc.RetainedNodeNum.RetainedNodNum.Row.HarvestNPruning
          RectangularZone Alley: Length=100; Width=1.5; Slope=0; AspectAngle=0; Altitude=50
            SurfaceOrganicMatter: InitialResidueName=wheat_stubble; InitialResidueType=wheat; InitialResidueMass=500; InitialStandingFraction=0; InitialCPR=0; InitialCNR=100
            Plant Slurp
            Fertiliser
            Irrigation
            Manager PastureInitialisation
              CultivarName = StaticCrop
              InitialRootDepth = 2000
              SowingDate = 02/25/2003 00:00:00
              RootDepth = 2000
              RFV = 10
              KLReductionFactor = -0.001
              KLReductionDepth = 150
              YKLModifiers =
              XDepth =
              MaxG = 0.004
              R50 = 150
              script: same as in Validation.Sauvignonblanc.RetainedNodeNum.RetainedNodNum.Alley.PastureInitialisation
            Manager SetPastureVariables: same as Validation.Sauvignonblanc.RetainedNodeNum.RetainedNodNum.Alley.SetPastureVariables
            Manager SetupPastureRootZones: same as Validation.Sauvignonblanc.RetainedNodeNum.RetainedNodNum.Alley.SetupPastureRootZones
            Soil: same as BaseSim.BaseSim.Alley.Soil
            Operations WinterRainfall
              2002-05-28  [Irrigation].Apply(200);
            Manager PlantVariables
              script: same as in BaseSim.BaseSim.Alley.PlantVariables
            Report ReportAlley: same as BaseSim.BaseSim.Alley.ReportAlley
      Experiment Marlborough_2Cane
        Factors
          Factor Climate
            Specification=[Weather].FileName = Site1001_BRA.met,Site1002_OYB.met,Site1003_SEA.met,Site1004_RPC.met
        Simulation VineFacts1
          Weather: FileName=Site1003_SEA.met
          Clock: Start=2003-02-25; End=2020-05-01
          Summary
          SoilArbitrator Soil Arbitrator
          MicroClimate: a_interception=0; b_interception=1; c_interception=0; d_interception=0; soil_albedo=0.23; SoilHeatFluxFraction=0.4; MinimumHeightDiffForNewLayer=0; NightInterceptionFraction=0.5; ReferenceHeight=2
          RectangularZone Row: Length=100; Width=0.9; Slope=0; AspectAngle=0; Altitude=50
            Report: EventNames=[Clock].DoReport
            Memo: same as BaseSim.BaseSim.Row.Memo
            Plant Grapevine
            Manager TreeInitialisation
              CultivarName = SauvignonBlanc
              SowingDate = 02/25/2003 00:00:00
              VineDistance = 1.8
              BudNumber = 24
              CordonNumber = 2
              CordonDiameter = 10
              CordonLength = 0.9
              TrunkDiameter = 65
              TrunkLength = 0.8
              RootTrunkRatio = 1
              RootNSC = 0.2
              TrunkNSC = 0.2
              CordonNSC = 0.2
              StartAge = 8
              script: same as in Validation.Sauvignonblanc.RetainedNodeNum.RetainedNodNum.Row.TreeInitialisation
            Irrigation
            Fertiliser
            SurfaceOrganicMatter: InitialResidueName=wheat_stubble; InitialResidueType=wheat; InitialResidueMass=500; InitialStandingFraction=0; InitialCPR=0; InitialCNR=100
            Soil: same as BaseSim.BaseSim.Row.Soil
            Manager SetupTreeRootZones: same as Validation.Sauvignonblanc.RetainedNodeNum.RetainedNodNum.Row.SetupTreeRootZones
            Operations VineIrrigation
            Operations WinterRainfall
              2002-05-28  [Irrigation].Apply(200);
            Manager PlantVariables: same as Validation.Sauvignonblanc.Marlborough_4Cane.VineFacts2.Row.PlantVariables
            Manager DripIrrigator: same as Validation.Sauvignonblanc.Marlborough_4Cane.VineFacts2.Row.DripIrrigator
            Manager HarvestNPruning: same as Validation.Sauvignonblanc.RetainedNodeNum.RetainedNodNum.Row.HarvestNPruning
          RectangularZone Alley: same as Validation.Sauvignonblanc.Marlborough_4Cane.VineFacts2.Alley
      Experiment Grape_RPC_1
        DisabledSimNames=[Grape_Squire_1Irri70, Grape_Squire_1Irri80, Grape_SquireIrri20, Grape_SquireIrri40, Grape_SquireIrri70, Grape_SquireIrri80]
        Factors
          Factor Irri: Specification=[VineIrrigation]
            Operations 100
              2002-02-14  [DripIrrigator].Script.applyDripIrri(10.6);
              2002-02-17  [DripIrrigator].Script.applyDripIrri(10.6);
              2002-02-19  [DripIrrigator].Script.applyDripIrri(10.6);
              2002-02-21  [DripIrrigator].Script.applyDripIrri(10.6);
              2002-02-25  [DripIrrigator].Script.applyDripIrri(10.6);
              2002-02-26  [DripIrrigator].Script.applyDripIrri(10.6);
              2002-03-03  [DripIrrigator].Script.applyDripIrri(10.6);
              2002-03-05  [DripIrrigator].Script.applyDripIrri(10.6);
              2002-03-07  [DripIrrigator].Script.applyDripIrri(10.6);
              2002-03-10  [DripIrrigator].Script.applyDripIrri(10.6);
              2002-03-12  [DripIrrigator].Script.applyDripIrri(10.6);
              2002-03-14  [DripIrrigator].Script.applyDripIrri(10.6);
              2002-03-19  [DripIrrigator].Script.applyDripIrri(10.6);
              2002-03-21  [DripIrrigator].Script.applyDripIrri(10.6);
              2002-03-24  [DripIrrigator].Script.applyDripIrri(10.6);
              2002-03-26  [DripIrrigator].Script.applyDripIrri(10.6);
              2002-04-01  [DripIrrigator].Script.applyDripIrri(10.6);
              2002-04-07  [DripIrrigator].Script.applyDripIrri(10.6);
              2002-04-10  [DripIrrigator].Script.applyDripIrri(10.6);
              2002-04-18  [DripIrrigator].Script.applyDripIrri(10.6);
              2002-04-21  [DripIrrigator].Script.applyDripIrri(10.6);
              2002-10-05  [DripIrrigator].Script.applyDripIrri(7.3);
              2002-10-08  [DripIrrigator].Script.applyDripIrri(7.3);
              2002-10-10  [DripIrrigator].Script.applyDripIrri(7.3);
              2002-10-12  [DripIrrigator].Script.applyDripIrri(7.3);
              2002-10-18  [DripIrrigator].Script.applyDripIrri(7.3);
              2002-10-23  [DripIrrigator].Script.applyDripIrri(7.3);
              2002-10-26  [DripIrrigator].Script.applyDripIrri(7.3);
              2002-10-28  [DripIrrigator].Script.applyDripIrri(7.3);
              2002-11-05  [DripIrrigator].Script.applyDripIrri(7.3);
              2002-11-08  [DripIrrigator].Script.applyDripIrri(7.3);
              2002-11-11  [DripIrrigator].Script.applyDripIrri(7.3);
              2002-11-18  [DripIrrigator].Script.applyDripIrri(7.3);
              2002-11-20  [DripIrrigator].Script.applyDripIrri(7.3);
              2002-11-23  [DripIrrigator].Script.applyDripIrri(7.3);
              2002-11-25  [DripIrrigator].Script.applyDripIrri(7.3);
              2002-11-29  [DripIrrigator].Script.applyDripIrri(7.3);
              2002-12-04  [DripIrrigator].Script.applyDripIrri(7.3);
              2002-12-09  [DripIrrigator].Script.applyDripIrri(7.3);
              2002-12-11  [DripIrrigator].Script.applyDripIrri(7.3);
              2002-12-19  [DripIrrigator].Script.applyDripIrri(7.3);
              2002-12-27  [DripIrrigator].Script.applyDripIrri(7.3);
              2002-12-31  [DripIrrigator].Script.applyDripIrri(7.3);
              2003-01-03  [DripIrrigator].Script.applyDripIrri(7.3);
              2003-01-08  [DripIrrigator].Script.applyDripIrri(7.3);
              2003-01-09  [DripIrrigator].Script.applyDripIrri(7.3);
              2003-01-11  [DripIrrigator].Script.applyDripIrri(7.3);
              2003-01-15  [DripIrrigator].Script.applyDripIrri(7.3);
              2003-01-18  [DripIrrigator].Script.applyDripIrri(7.3);
              2003-01-23  [DripIrrigator].Script.applyDripIrri(7.3);
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              2003-12-03  [DripIrrigator].Script.applyDripIrri(5.2);
              2003-12-07  [DripIrrigator].Script.applyDripIrri(7);
              2004-02-05  [DripIrrigator].Script.applyDripIrri(3.5);
              2005-02-26  [DripIrrigator].Script.applyDripIrri(6.9);
            Operations 60
              2002-02-14  [DripIrrigator].Script.applyDripIrri(6.3);
              2002-02-17  [DripIrrigator].Script.applyDripIrri(6.3);
              2002-02-19  [DripIrrigator].Script.applyDripIrri(6.3);
              2002-02-21  [DripIrrigator].Script.applyDripIrri(6.3);
              2002-02-25  [DripIrrigator].Script.applyDripIrri(6.3);
              2002-02-26  [DripIrrigator].Script.applyDripIrri(6.3);
              2002-03-03  [DripIrrigator].Script.applyDripIrri(6.3);
              2002-03-05  [DripIrrigator].Script.applyDripIrri(6.3);
              2002-03-07  [DripIrrigator].Script.applyDripIrri(6.3);
              2002-03-10  [DripIrrigator].Script.applyDripIrri(6.3);
              2002-03-12  [DripIrrigator].Script.applyDripIrri(6.3);
              2002-03-14  [DripIrrigator].Script.applyDripIrri(6.3);
              2002-03-19  [DripIrrigator].Script.applyDripIrri(6.3);
              2002-03-21  [DripIrrigator].Script.applyDripIrri(6.3);
              2002-03-24  [DripIrrigator].Script.applyDripIrri(6.3);
              2002-03-26  [DripIrrigator].Script.applyDripIrri(6.3);
              2002-04-01  [DripIrrigator].Script.applyDripIrri(6.3);
              2002-04-07  [DripIrrigator].Script.applyDripIrri(6.3);
              2002-04-10  [DripIrrigator].Script.applyDripIrri(6.3);
              2002-04-18  [DripIrrigator].Script.applyDripIrri(6.3);
              2002-04-21  [DripIrrigator].Script.applyDripIrri(6.3);
              2002-10-05  [DripIrrigator].Script.applyDripIrri(4.4);
              2002-10-08  [DripIrrigator].Script.applyDripIrri(4.4);
              2002-10-10  [DripIrrigator].Script.applyDripIrri(4.4);
              2002-10-12  [DripIrrigator].Script.applyDripIrri(4.4);
              2002-10-18  [DripIrrigator].Script.applyDripIrri(4.4);
              2002-10-23  [DripIrrigator].Script.applyDripIrri(4.4);
              2002-10-26  [DripIrrigator].Script.applyDripIrri(4.4);
              2002-10-28  [DripIrrigator].Script.applyDripIrri(4.4);
              2002-11-05  [DripIrrigator].Script.applyDripIrri(4.4);
              2002-11-08  [DripIrrigator].Script.applyDripIrri(4.4);
              2002-11-11  [DripIrrigator].Script.applyDripIrri(4.4);
              2002-11-18  [DripIrrigator].Script.applyDripIrri(4.4);
              2002-11-20  [DripIrrigator].Script.applyDripIrri(4.4);
              2002-11-23  [DripIrrigator].Script.applyDripIrri(4.4);
              2002-11-25  [DripIrrigator].Script.applyDripIrri(4.4);
              2002-11-29  [DripIrrigator].Script.applyDripIrri(4.4);
              2002-12-04  [DripIrrigator].Script.applyDripIrri(4.4);
              2002-12-09  [DripIrrigator].Script.applyDripIrri(4.4);
              2002-12-11  [DripIrrigator].Script.applyDripIrri(4.4);
              2002-12-19  [DripIrrigator].Script.applyDripIrri(4.4);
              2002-12-27  [DripIrrigator].Script.applyDripIrri(4.4);
              2002-12-31  [DripIrrigator].Script.applyDripIrri(4.4);
              2003-01-03  [DripIrrigator].Script.applyDripIrri(4.4);
              2003-01-08  [DripIrrigator].Script.applyDripIrri(4.4);
              2003-01-09  [DripIrrigator].Script.applyDripIrri(4.4);
              2003-01-11  [DripIrrigator].Script.applyDripIrri(4.4);
              2003-01-15  [DripIrrigator].Script.applyDripIrri(4.4);
              2003-01-18  [DripIrrigator].Script.applyDripIrri(4.4);
              2003-01-23  [DripIrrigator].Script.applyDripIrri(4.4);
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              2003-12-03  [DripIrrigator].Script.applyDripIrri(3.1);
              2003-12-07  [DripIrrigator].Script.applyDripIrri(4.2);
              2004-02-05  [DripIrrigator].Script.applyDripIrri(2.1);
              2005-02-26  [DripIrrigator].Script.applyDripIrri(4.1);
        Simulation RPC_1
          Clock: Start=2000-02-25; End=2002-05-02
          Summary SummaryFile
          Weather: FileName=Site1004_RPC.met
          MicroClimate: a_interception=0; b_interception=1; c_interception=0; d_interception=0; soil_albedo=0.3; SoilHeatFluxFraction=0.4; MinimumHeightDiffForNewLayer=0; NightInterceptionFraction=0.5; ReferenceHeight=2
          SoilArbitrator Soil Arbitrator
          RectangularZone Row: Length=100; Width=0.9; Slope=0; AspectAngle=0; Altitude=50
            Report: EventNames=[Clock].DoReport
            Memo: same as BaseSim.BaseSim.Row.Memo
            Plant Grapevine
            Irrigation
            Fertiliser
            SurfaceOrganicMatter: InitialResidueName=wheat_stubble; InitialResidueType=wheat; InitialResidueMass=500; InitialStandingFraction=0; InitialCPR=0; InitialCNR=100
            Soil: same as BaseSim.BaseSim.Row.Soil
            Manager SetupTreeRootZones
              UseExtraZone = True
```csharp
using Models.PMF.Organs;
using System;
using Models.Core;
using System.Collections.Generic;
using System.Text;
using Models.PMF;
using Models;
using System.Xml.Serialization;
using APSIM.Shared.Utilities;
using Models.Functions;

namespace Models
{
    [Serializable] 
    public class Script : Model
    {
        [Link] private Plant Grapevine;
        [Link] private Clock Clock;
        [Link] private Zone zone;
        [Link(Type = LinkType.Path, Path = "[Grapevine].Root")]
        private Root root;

        [Description("Use extra root zone")]
        public bool UseExtraZone { get; set; }

        
        [EventSubscribe("StartOfSimulation")]
        private void OnSimulationCommencing(object sender, EventArgs e)
        {
            if (UseExtraZone)
            {
            root.ZoneNamesToGrowRootsIn.Add("Alley");
            root.ZoneRootDepths.Add(2600);
BiomassDemand InitialDM = new BiomassDemand();
Constant InitStruct = new Constant();
InitStruct.FixedValue = 500;
InitialDM.Structural = InitStruct;
Constant InitMetab = new Constant();
InitMetab.FixedValue = 0;
InitialDM.Metabolic = InitMetab;
Constant InitStor = new Constant();
InitStor.FixedValue = 100;
InitialDM.Storage = InitStor;
            root.ZoneInitialDM.Add(InitialDM);

            }
        }
    }
}
```
            Operations VineIrrigation
            Operations WinterRainfall
              2002-05-28  [Irrigation].Apply(200);
            Manager PlantVariables
              FRadInt = 0
              ET = 0
              ES = 0
              PET = 0
              LAI = 0
              LAIPerVine = 0
              Height = 0
              RootDepth = 0
              PlantWidth = 0
```csharp
using Models.Climate;
using System;
using Models.Core;
using Models.PMF;
using System.Collections.Generic;
using Models.Soils;
using APSIM.Shared.Utilities;
using Models.Zones;
using Models.PMF.Organs;

namespace Models
{
    [Serializable]
    public class Script : Model
    {
        [Link] private Weather weather;
        [Link(Type = LinkType.Path, Path = "[Grapevine].Root")]
        private Root root;
        private RectangularZone AlleyZone {get; set; }
        private RectangularZone RowZone {get; set;}
        private RectangularZone ThisZone {get; set;}
        private double AreaWidth {get; set;}

        public double FRadInt {get; set;}
        public double ET {get; set;}
        public double ES {get; set;}
        public double PET {get; set;}
        public double LAI {get; set;}
        public double LAIPerVine {get; set;}
        public double Height {get; set;}
        public double RootDepth {get; set;}
        public double PlantWidth {get; set;}

        [EventSubscribe("StartOfSimulation")]
        private void DoStartOfSimulation(object sender, EventArgs e)
        {
               
               ThisZone = this.Parent.Parent as RectangularZone;
               RowZone = this.Parent.Parent.Parent.FindInScope("Row") as RectangularZone;
               AlleyZone = (RectangularZone)this.Parent.Parent.Parent.FindInScope("Alley") as RectangularZone;
               AreaWidth = AlleyZone.Width + RowZone.Width;
               PlantWidth = 0;
        }
        
        [EventSubscribe("DoReportCalculations")]
        private void OnDoReportCalculations(object sender, EventArgs e)
        {
            if (ThisZone.Name == "Row")
                {
                FRadInt = ((double)RowZone.Get("Grapevine.Leaf.RadIntTot") * RowZone.Width)/(weather.Radn * AreaWidth);
                ET = (double)RowZone.Get("Grapevine.Leaf.Transpiration") * RowZone.Width/AreaWidth;
                LAI = (double)RowZone.Get("Grapevine.Leaf.LAI");
                LAIPerVine =  LAI*RowZone.Width*1.8;
                //TreeInitialisation.Script.VineDistance;
                //(double)RowZone.Get("Grapevine.Leaf.LAI");
                Height = (double)RowZone.Get("Grapevine.Leaf.Height");
                RootDepth = (double)RowZone.Get("Grapevine.Root.Depth");
                PlantWidth = (double)RowZone.Get("Grapevine.Leaf.Width");
                }
            else
                {
                FRadInt = ((double)AlleyZone.Get("Slurp.Leaf.RadIntTot") * ThisZone.Width)/ (weather.Radn * AreaWidth);
                ET = (double)AlleyZone.Get("Slurp.Leaf.Transpiration") * ThisZone.Width/AreaWidth;
                LAI = (double)AlleyZone.Get("Slurp.Leaf.LAI");
                Height = (double)AlleyZone.Get("Slurp.Leaf.Height");
                RootDepth = (double)AlleyZone.Get("Slurp.Root.Depth");
                }

            ES = (double)ThisZone.Get("Soil.SoilWater.Es") * ThisZone.Width/AreaWidth;
            double PETWidth = Math.Min(Math.Max(PlantWidth,ThisZone.Width),AreaWidth);
            PET = (double)ThisZone.Get("Soil.SoilWater.Eo") * PETWidth/AreaWidth;
        }
    }
}
```
            Manager DripIrrigator: same as BaseSim.BaseSim.Row.DripIrrigator
            Manager TreeInitialisation
              CultivarName = SauvignonBlanc
              SowingDate = 02/25/2000 00:00:00
              VineDistance = 1.8
              BudNumber = 44
              CordonNumber = 4
              CordonDiameter = 10
              CordonLength = 0.9
              TrunkDiameter = 65
              TrunkLength = 0.8
              RootTrunkRatio = 1
              RootNSC = 0.2
              TrunkNSC = 0.2
              CordonNSC = 0.2
              StartAge = 8
              script: same as in Validation.Sauvignonblanc.RetainedNodeNum.RetainedNodNum.Row.TreeInitialisation
            Manager HarvestNPruning
              LeafPluckingDAWS = 209
              HarvestDAWS = 305
              PruningDAWS = 341
              FrostDate1 = 10/03/2002 00:00:00
              FrostDate2 = 11/18/2002 00:00:00
              script: same as in Validation.Sauvignonblanc.RetainedNodeNum.RetainedNodNum.Row.HarvestNPruning
          RectangularZone Alley: Length=100; Width=1.5; Slope=0; AspectAngle=0; Altitude=50
            Report ReportAlley: EventNames=[Clock].DoReport
              VariableNames:
                [Clock].Today
                [Clock].Today.Year
                [Clock].Today.DayOfYear
                [Weather].DaysSinceWinterSolstice as DAWS
                [PlantVariables].Script.Height as height
                [PlantVariables].Script.LAI as lai
                [PlantVariables].Script.FRadInt as f.rad.int
                [PlantVariables].Script.ET as transpiration
                [PlantVariables].Script.ES as Es
                [PlantVariables].Script.PET as PET
                [PlantVariables].Script.RootDepth as rootDepth
                [Soil].OutputLayers.SW
                sum([Soil].OutputLayers.SWmm) as psw
                [Weather].Rain
                [Irrigation].IrrigationApplied
                [Soil].SoilWater.Drainage
            SurfaceOrganicMatter: InitialResidueName=wheat_stubble; InitialResidueType=wheat; InitialResidueMass=500; InitialStandingFraction=0; InitialCPR=0; InitialCNR=100
            Plant Slurp
            Fertiliser
            Irrigation
            Manager PastureInitialisation
              CultivarName = StaticCrop
              InitialRootDepth = 2000
              SowingDate = 02/25/2000 00:00:00
              RootDepth = 2000
              RFV = 10
              KLReductionFactor = -0.001
              KLReductionDepth = 150
              YKLModifiers =
              XDepth =
              MaxG = 0.004
              R50 = 150
              script: same as in BaseSim.BaseSim.Alley.PastureInitialisation
            Manager SetPastureVariables: same as BaseSim.BaseSim.Alley.SetPastureVariables
            Manager SetupPastureRootZones: same as BaseSim.BaseSim.Alley.SetupPastureRootZones
            Soil: same as BaseSim.BaseSim.Alley.Soil
            Operations WinterRainfall
              2002-05-28  [Irrigation].Apply(200);
            Manager PlantVariables
              FRadInt = 0
              ET = 0
              ES = 0
              PET = 0
              LAI = 0
              Height = 0
              RootDepth = 0
              PlantWidth = 0
```csharp
using Models.Climate;
using System;
using Models.Core;
using Models.PMF;
using System.Collections.Generic;
using Models.Soils;
using APSIM.Shared.Utilities;
using Models.Zones;
using Models.PMF.Organs;

namespace Models
{
    [Serializable]
    public class Script : Model
    {
        [Link] private Weather weather;
        [Link(Type = LinkType.Path, Path = "[Grapevine].Root")]
        private Root root;
        private RectangularZone AlleyZone {get; set; }
        private RectangularZone RowZone {get; set;}
        private RectangularZone ThisZone {get; set;}
        private double AreaWidth {get; set;}

        public double FRadInt {get; set;}
        public double ET {get; set;}
        public double ES {get; set;}
        public double PET {get; set;}
        public double LAI {get; set;}
        public double Height {get; set;}
        public double RootDepth {get; set;}
        public double PlantWidth {get; set;}

        [EventSubscribe("StartOfSimulation")]
        private void DoStartOfSimulation(object sender, EventArgs e)
        {
               
               ThisZone = this.Parent.Parent as RectangularZone;
               RowZone = this.Parent.Parent.Parent.FindInScope("Row") as RectangularZone;
               AlleyZone = (RectangularZone)this.Parent.Parent.Parent.FindInScope("Alley") as RectangularZone;
               AreaWidth = AlleyZone.Width + RowZone.Width;
               PlantWidth = 0;
        }
        
        [EventSubscribe("DoReportCalculations")]
        private void OnDoReportCalculations(object sender, EventArgs e)
        {
            if (ThisZone.Name == "Row")
                {
                FRadInt = ((double)RowZone.Get("Grapevine.Leaf.RadIntTot") * RowZone.Width)/(weather.Radn * AreaWidth);
                ET = (double)RowZone.Get("Grapevine.Leaf.Transpiration") * RowZone.Width/AreaWidth;
                LAI = (double)RowZone.Get("Grapevine.Leaf.LAI");
                Height = (double)RowZone.Get("Grapevine.Leaf.Height");
                RootDepth = (double)RowZone.Get("Grapevine.Root.Depth");
                PlantWidth = (double)RowZone.Get("Grapevine.Leaf.Width");
                }
            else
                {
                FRadInt = ((double)AlleyZone.Get("Slurp.Leaf.RadIntTot") * ThisZone.Width)/ (weather.Radn * AreaWidth);
                ET = (double)AlleyZone.Get("Slurp.Leaf.Transpiration") * ThisZone.Width/AreaWidth;
                LAI = (double)AlleyZone.Get("Slurp.Leaf.LAI");
                Height = (double)AlleyZone.Get("Slurp.Leaf.Height");
                RootDepth = (double)AlleyZone.Get("Slurp.Root.Depth");
                }

            ES = (double)ThisZone.Get("Soil.SoilWater.Es") * ThisZone.Width/AreaWidth;
            double PETWidth = Math.Min(Math.Max(PlantWidth,ThisZone.Width),AreaWidth);
            PET = (double)ThisZone.Get("Soil.SoilWater.Eo") * PETWidth/AreaWidth;
        }
    }
}
```
      Experiment Grape_RPC_2
        DisabledSimNames=[Grape_Squire_1Irri70, Grape_Squire_1Irri80, Grape_SquireIrri20, Grape_SquireIrri40, Grape_SquireIrri70, Grape_SquireIrri80]
        Factors
          Factor Irri: Specification=[VineIrrigation]
            Operations 20
              2002-02-14  [DripIrrigator].Script.applyDripIrri(2.1);
              2002-02-17  [DripIrrigator].Script.applyDripIrri(2.1);
              2002-02-19  [DripIrrigator].Script.applyDripIrri(2.1);
              2002-02-21  [DripIrrigator].Script.applyDripIrri(2.1);
              2002-02-25  [DripIrrigator].Script.applyDripIrri(2.1);
              2002-02-26  [DripIrrigator].Script.applyDripIrri(2.1);
              2002-03-03  [DripIrrigator].Script.applyDripIrri(2.1);
              2002-03-05  [DripIrrigator].Script.applyDripIrri(2.1);
              2002-03-07  [DripIrrigator].Script.applyDripIrri(2.1);
              2002-03-10  [DripIrrigator].Script.applyDripIrri(2.1);
              2002-03-12  [DripIrrigator].Script.applyDripIrri(2.1);
              2002-03-14  [DripIrrigator].Script.applyDripIrri(2.1);
              2002-03-19  [DripIrrigator].Script.applyDripIrri(2.1);
              2002-03-21  [DripIrrigator].Script.applyDripIrri(2.1);
              2002-03-24  [DripIrrigator].Script.applyDripIrri(2.1);
              2002-03-26  [DripIrrigator].Script.applyDripIrri(2.1);
              2002-04-01  [DripIrrigator].Script.applyDripIrri(2.1);
              2002-04-07  [DripIrrigator].Script.applyDripIrri(2.1);
              2002-04-10  [DripIrrigator].Script.applyDripIrri(2.1);
              2002-04-18  [DripIrrigator].Script.applyDripIrri(2.1);
              2002-04-21  [DripIrrigator].Script.applyDripIrri(2.1);
              2002-10-05  [DripIrrigator].Script.applyDripIrri(1.5);
              2002-10-08  [DripIrrigator].Script.applyDripIrri(1.5);
              2002-10-10  [DripIrrigator].Script.applyDripIrri(1.5);
              2002-10-12  [DripIrrigator].Script.applyDripIrri(1.5);
              2002-10-18  [DripIrrigator].Script.applyDripIrri(1.5);
              2002-10-23  [DripIrrigator].Script.applyDripIrri(1.5);
              2002-10-26  [DripIrrigator].Script.applyDripIrri(1.5);
              2002-10-28  [DripIrrigator].Script.applyDripIrri(1.5);
              2002-11-05  [DripIrrigator].Script.applyDripIrri(1.5);
              2002-11-08  [DripIrrigator].Script.applyDripIrri(1.5);
              2002-11-11  [DripIrrigator].Script.applyDripIrri(1.5);
              2002-11-18  [DripIrrigator].Script.applyDripIrri(1.5);
              2002-11-20  [DripIrrigator].Script.applyDripIrri(1.5);
              2002-11-23  [DripIrrigator].Script.applyDripIrri(1.5);
              2002-11-25  [DripIrrigator].Script.applyDripIrri(1.5);
              2002-11-29  [DripIrrigator].Script.applyDripIrri(1.5);
              2002-12-04  [DripIrrigator].Script.applyDripIrri(1.5);
              2002-12-09  [DripIrrigator].Script.applyDripIrri(1.5);
              2002-12-11  [DripIrrigator].Script.applyDripIrri(1.5);
              2002-12-19  [DripIrrigator].Script.applyDripIrri(1.5);
              2002-12-27  [DripIrrigator].Script.applyDripIrri(1.5);
              2002-12-31  [DripIrrigator].Script.applyDripIrri(1.5);
              2003-01-03  [DripIrrigator].Script.applyDripIrri(1.5);
              2003-01-08  [DripIrrigator].Script.applyDripIrri(1.5);
              2003-01-09  [DripIrrigator].Script.applyDripIrri(1.5);
              2003-01-11  [DripIrrigator].Script.applyDripIrri(1.5);
              2003-01-15  [DripIrrigator].Script.applyDripIrri(1.5);
              2003-01-18  [DripIrrigator].Script.applyDripIrri(1.5);
              2003-01-23  [DripIrrigator].Script.applyDripIrri(1.5);
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              2003-12-03  [DripIrrigator].Script.applyDripIrri(1);
              2003-12-07  [DripIrrigator].Script.applyDripIrri(1.4);
              2004-02-05  [DripIrrigator].Script.applyDripIrri(0.7);
              2004-12-18  [DripIrrigator].Script.applyDripIrri(1.6);
            Operations 100
              2002-02-14  [DripIrrigator].Script.applyDripIrri(6.3);
              2002-02-17  [DripIrrigator].Script.applyDripIrri(6.3);
              2002-02-19  [DripIrrigator].Script.applyDripIrri(6.3);
              2002-02-21  [DripIrrigator].Script.applyDripIrri(6.3);
              2002-02-25  [DripIrrigator].Script.applyDripIrri(6.3);
              2002-02-26  [DripIrrigator].Script.applyDripIrri(6.3);
              2002-03-03  [DripIrrigator].Script.applyDripIrri(6.3);
              2002-03-05  [DripIrrigator].Script.applyDripIrri(6.3);
              2002-03-07  [DripIrrigator].Script.applyDripIrri(6.3);
              2002-03-10  [DripIrrigator].Script.applyDripIrri(6.3);
              2002-03-12  [DripIrrigator].Script.applyDripIrri(6.3);
              2002-03-14  [DripIrrigator].Script.applyDripIrri(6.3);
              2002-03-19  [DripIrrigator].Script.applyDripIrri(6.3);
              2002-03-21  [DripIrrigator].Script.applyDripIrri(6.3);
              2002-03-24  [DripIrrigator].Script.applyDripIrri(6.3);
              2002-03-26  [DripIrrigator].Script.applyDripIrri(6.3);
              2002-04-01  [DripIrrigator].Script.applyDripIrri(6.3);
              2002-04-07  [DripIrrigator].Script.applyDripIrri(6.3);
              2002-04-10  [DripIrrigator].Script.applyDripIrri(6.3);
              2002-04-18  [DripIrrigator].Script.applyDripIrri(6.3);
              2002-04-21  [DripIrrigator].Script.applyDripIrri(6.3);
              2002-10-05  [DripIrrigator].Script.applyDripIrri(4.4);
              2002-10-08  [DripIrrigator].Script.applyDripIrri(4.4);
              2002-10-10  [DripIrrigator].Script.applyDripIrri(4.4);
              2002-10-12  [DripIrrigator].Script.applyDripIrri(4.4);
              2002-10-18  [DripIrrigator].Script.applyDripIrri(4.4);
              2002-10-23  [DripIrrigator].Script.applyDripIrri(4.4);
              2002-10-26  [DripIrrigator].Script.applyDripIrri(4.4);
              2002-10-28  [DripIrrigator].Script.applyDripIrri(4.4);
              2002-11-05  [DripIrrigator].Script.applyDripIrri(4.4);
              2002-11-08  [DripIrrigator].Script.applyDripIrri(4.4);
              2002-11-11  [DripIrrigator].Script.applyDripIrri(4.4);
              2002-11-18  [DripIrrigator].Script.applyDripIrri(4.4);
              2002-11-20  [DripIrrigator].Script.applyDripIrri(4.4);
              2002-11-23  [DripIrrigator].Script.applyDripIrri(4.4);
              2002-11-25  [DripIrrigator].Script.applyDripIrri(4.4);
              2002-11-29  [DripIrrigator].Script.applyDripIrri(4.4);
              2002-12-04  [DripIrrigator].Script.applyDripIrri(4.4);
              2002-12-09  [DripIrrigator].Script.applyDripIrri(4.4);
              2002-12-11  [DripIrrigator].Script.applyDripIrri(4.4);
              2002-12-19  [DripIrrigator].Script.applyDripIrri(4.4);
              2002-12-27  [DripIrrigator].Script.applyDripIrri(4.4);
              2002-12-31  [DripIrrigator].Script.applyDripIrri(4.4);
              2003-01-03  [DripIrrigator].Script.applyDripIrri(4.4);
              2003-01-08  [DripIrrigator].Script.applyDripIrri(4.4);
              2003-01-09  [DripIrrigator].Script.applyDripIrri(4.4);
              2003-01-11  [DripIrrigator].Script.applyDripIrri(4.4);
              2003-01-15  [DripIrrigator].Script.applyDripIrri(4.4);
              2003-01-18  [DripIrrigator].Script.applyDripIrri(4.4);
              2003-01-23  [DripIrrigator].Script.applyDripIrri(4.4);
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              2003-12-03  [DripIrrigator].Script.applyDripIrri(3.1);
              2003-12-07  [DripIrrigator].Script.applyDripIrri(4.2);
              2004-02-05  [DripIrrigator].Script.applyDripIrri(2.1);
              2005-02-26  [DripIrrigator].Script.applyDripIrri(4.1);
            Operations 60
              2002-02-14  [DripIrrigator].Script.applyDripIrri(6.3);
              2002-02-17  [DripIrrigator].Script.applyDripIrri(6.3);
              2002-02-19  [DripIrrigator].Script.applyDripIrri(6.3);
              2002-02-21  [DripIrrigator].Script.applyDripIrri(6.3);
              2002-02-25  [DripIrrigator].Script.applyDripIrri(6.3);
              2002-02-26  [DripIrrigator].Script.applyDripIrri(6.3);
              2002-03-03  [DripIrrigator].Script.applyDripIrri(6.3);
              2002-03-05  [DripIrrigator].Script.applyDripIrri(6.3);
              2002-03-07  [DripIrrigator].Script.applyDripIrri(6.3);
              2002-03-10  [DripIrrigator].Script.applyDripIrri(6.3);
              2002-03-12  [DripIrrigator].Script.applyDripIrri(6.3);
              2002-03-14  [DripIrrigator].Script.applyDripIrri(6.3);
              2002-03-19  [DripIrrigator].Script.applyDripIrri(6.3);
              2002-03-21  [DripIrrigator].Script.applyDripIrri(6.3);
              2002-03-24  [DripIrrigator].Script.applyDripIrri(6.3);
              2002-03-26  [DripIrrigator].Script.applyDripIrri(6.3);
              2002-04-01  [DripIrrigator].Script.applyDripIrri(6.3);
              2002-04-07  [DripIrrigator].Script.applyDripIrri(6.3);
              2002-04-10  [DripIrrigator].Script.applyDripIrri(6.3);
              2002-04-18  [DripIrrigator].Script.applyDripIrri(6.3);
              2002-04-21  [DripIrrigator].Script.applyDripIrri(6.3);
              2002-10-05  [DripIrrigator].Script.applyDripIrri(4.4);
              2002-10-08  [DripIrrigator].Script.applyDripIrri(4.4);
              2002-10-10  [DripIrrigator].Script.applyDripIrri(4.4);
              2002-10-12  [DripIrrigator].Script.applyDripIrri(4.4);
              2002-10-18  [DripIrrigator].Script.applyDripIrri(4.4);
              2002-10-23  [DripIrrigator].Script.applyDripIrri(4.4);
              2002-10-26  [DripIrrigator].Script.applyDripIrri(4.4);
              2002-10-28  [DripIrrigator].Script.applyDripIrri(4.4);
              2002-11-05  [DripIrrigator].Script.applyDripIrri(4.4);
              2002-11-08  [DripIrrigator].Script.applyDripIrri(4.4);
              2002-11-11  [DripIrrigator].Script.applyDripIrri(4.4);
              2002-11-18  [DripIrrigator].Script.applyDripIrri(4.4);
              2002-11-20  [DripIrrigator].Script.applyDripIrri(4.4);
              2002-11-23  [DripIrrigator].Script.applyDripIrri(4.4);
              2002-11-25  [DripIrrigator].Script.applyDripIrri(4.4);
              2002-11-29  [DripIrrigator].Script.applyDripIrri(4.4);
              2002-12-04  [DripIrrigator].Script.applyDripIrri(4.4);
              2002-12-09  [DripIrrigator].Script.applyDripIrri(4.4);
              2002-12-11  [DripIrrigator].Script.applyDripIrri(4.4);
              2002-12-19  [DripIrrigator].Script.applyDripIrri(4.4);
              2002-12-27  [DripIrrigator].Script.applyDripIrri(4.4);
              2002-12-31  [DripIrrigator].Script.applyDripIrri(4.4);
              2003-01-03  [DripIrrigator].Script.applyDripIrri(4.4);
              2003-01-08  [DripIrrigator].Script.applyDripIrri(4.4);
              2003-01-09  [DripIrrigator].Script.applyDripIrri(4.4);
              2003-01-11  [DripIrrigator].Script.applyDripIrri(4.4);
              2003-01-15  [DripIrrigator].Script.applyDripIrri(4.4);
              2003-01-18  [DripIrrigator].Script.applyDripIrri(4.4);
              2003-01-23  [DripIrrigator].Script.applyDripIrri(4.4);
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              2003-12-03  [DripIrrigator].Script.applyDripIrri(3.1);
              2003-12-07  [DripIrrigator].Script.applyDripIrri(4.2);
              2004-02-05  [DripIrrigator].Script.applyDripIrri(2.1);
              2005-02-26  [DripIrrigator].Script.applyDripIrri(4.1);
              2004-12-18  [DripIrrigator].Script.applyDripIrri(4.8);
        Simulation RPC_2
          Clock: Start=2002-02-25; End=2006-07-01
          Summary SummaryFile
          Weather: FileName=Site1004_RPC.met
          MicroClimate: a_interception=0; b_interception=1; c_interception=0; d_interception=0; soil_albedo=0.3; SoilHeatFluxFraction=0.4; MinimumHeightDiffForNewLayer=0; NightInterceptionFraction=0.5; ReferenceHeight=2
          SoilArbitrator Soil Arbitrator
          RectangularZone Row: Length=100; Width=0.9; Slope=0; AspectAngle=0; Altitude=50
            Report: EventNames=[Clock].DoReport
            Memo: same as BaseSim.BaseSim.Row.Memo
            Plant Grapevine
            Irrigation
            Fertiliser
            SurfaceOrganicMatter: InitialResidueName=wheat_stubble; InitialResidueType=wheat; InitialResidueMass=500; InitialStandingFraction=0; InitialCPR=0; InitialCNR=100
            Manager SetupTreeRootZones: same as BaseSim.BaseSim.Row.SetupTreeRootZones
            Operations VineIrrigation
            Operations WinterRainfall
              2002-05-28  [Irrigation].Apply(200);
            Soil: Latitude=0; Longitude=0
              LayerStructure: Thickness=[200, 200, 200, 200, 200, 200, 400, 400, 400, 600]
              Chemical
                Thickness  NO3N     NH4N  PH
                100        160.741  0     6.6
                200        10.8108  0     6.2
                300        1.19048  0     5.7
                300        1.19048  0     5.5
                300        0        0     5.5
                300        0        0     5.5
              Physical
                Thickness  BD    AirDry  LL15  DUL   SAT
                150        1.35  0.06    0.12  0.28  0.36
                750        1.4   0.1     0.1   0.28  0.36
                150        1.4   0.005   0.05  0.28  0.35
                150        1.4   0.05    0.05  0.28  0.35
                1950       1.5   0.06    0.06  0.15  0.3
                SoilCrop GrapevineSoil: LL=[0.12, 0.1, 0.05, 0.05, 0.06]; KL=[0.1, 0.04, 0.03, 0.03, 0.02]; XF=[1, 1, 1, 1, 1]
                SoilCrop SlurpSoil: LL=[0.12, 0.1, 0.05, 0.05, 0.06]; KL=[0.1, 0.04, 0.01, 0, 0]; XF=[1, 1, 1, 1, 1]
              WaterBalance SoilWater: same as BaseSim.BaseSim.Row.Soil.SoilWater
              SoilNitrogen: same as BaseSim.BaseSim.Row.Soil.SoilNitrogen
              Organic: same as BaseSim.BaseSim.Row.Soil.Organic
              CERESSoilTemperature Temperature
              OutputLayers: Thickness=[150, 150, 150, 150, 150, 150, 150]
              InitialWater: PercentMethod=0; FractionFull=0.8
            Manager PlantVariables: same as Validation.Sauvignonblanc.Grape_RPC_1.RPC_1.Row.PlantVariables
            Manager DripIrrigator
              totalIrrigation = 0
```csharp
using APSIM.Shared.Utilities;
using System.Xml.Serialization;
using Models;
using Models.PMF;
using Models.Soils;
using System.Text;
using System.Collections.Generic;
using Models.Core;
using System;

namespace Models
{
    [Serializable] 
    public class Script : Model
    {
       [Link] Irrigation irrigation;
        public void applyDripIrri(double amount)
        {
            double layerAmount = amount/4;
            irrigation.Apply(layerAmount, 0);
            irrigation.Apply(layerAmount*2, 220);
            irrigation.Apply(layerAmount, 420);

        }
        public double totalIrrigation {get; set;}
        [EventSubscribe("Irrigated")]
        private void OnIrrigated(object sender, 
        IrrigationApplicationType irrigData)
        {
            totalIrrigation += irrigData.Amount;
         }
    }
}
```
            Manager TreeInitialisation
              CultivarName = SauvignonBlanc
              SowingDate = 02/25/2002 00:00:00
              VineDistance = 1.8
              BudNumber = 44
              CordonNumber = 4
              CordonDiameter = 10
              CordonLength = 0.9
              TrunkDiameter = 65
              TrunkLength = 0.8
              RootTrunkRatio = 1
              RootNSC = 0.2
              TrunkNSC = 0.2
              CordonNSC = 0.2
              StartAge = 8
              script: same as in Validation.Sauvignonblanc.RetainedNodeNum.RetainedNodNum.Row.TreeInitialisation
            Manager HarvestNPruning: same as Validation.Sauvignonblanc.Grape_RPC_1.RPC_1.Row.HarvestNPruning
          RectangularZone Alley: Length=100; Width=1.5; Slope=0; AspectAngle=0; Altitude=50
            SurfaceOrganicMatter: InitialResidueName=wheat_stubble; InitialResidueType=wheat; InitialResidueMass=500; InitialStandingFraction=0; InitialCPR=0; InitialCNR=100
            Plant Slurp
            Fertiliser
            Irrigation
            Manager PastureInitialisation
              CultivarName = StaticCrop
              InitialRootDepth = 2000
              SowingDate = 02/25/2002 00:00:00
              RootDepth = 2000
              RFV = 10
              KLReductionFactor = -0.001
              KLReductionDepth = 150
              YKLModifiers =
              XDepth =
              MaxG = 0.004
              R50 = 150
              script: same as in BaseSim.BaseSim.Alley.PastureInitialisation
            Manager SetPastureVariables: same as BaseSim.BaseSim.Alley.SetPastureVariables
            Manager SetupPastureRootZones: same as BaseSim.BaseSim.Alley.SetupPastureRootZones
            Operations WinterRainfall
              2002-05-28  [Irrigation].Apply(200);
            Soil: Latitude=0; Longitude=0
              LayerStructure: Thickness=[200, 200, 200, 200, 200, 200, 400, 400, 400, 600]
              Chemical: same as Validation.Sauvignonblanc.Grape_RPC_2.RPC_2.Row.Soil.Chemical
              WaterBalance SoilWater: same as BaseSim.BaseSim.Row.Soil.SoilWater
              SoilNitrogen: same as BaseSim.BaseSim.Row.Soil.SoilNitrogen
              Organic: same as BaseSim.BaseSim.Row.Soil.Organic
              CERESSoilTemperature Temperature
              OutputLayers: Thickness=[150, 150, 150, 150, 150, 150, 150]
              InitialWater: PercentMethod=0; FractionFull=0.8
              Physical
                Thickness  BD    AirDry  LL15  DUL   SAT
                150        1.35  0.06    0.12  0.28  0.36
                750        1.4   0.1     0.1   0.28  0.36
                150        1.4   0.005   0.05  0.28  0.35
                150        1.4   0.05    0.05  0.28  0.35
                1950       1.5   0.06    0.06  0.15  0.3
                SoilCrop GrapevineSoil: LL=[0.12, 0.1, 0.05, 0.05, 0.06]; KL=[0.12, 0.05, 0.03, 0.03, 0.02]; XF=[1, 1, 1, 1, 1]
                SoilCrop SlurpSoil: LL=[0.12, 0.1, 0.05, 0.05, 0.06]; KL=[0.11, 0.11, 0.11, 0.11, 0.11]; XF=[1, 1, 1, 1, 1]
            Manager PlantVariables: same as Validation.Sauvignonblanc.Grape_RPC_1.RPC_1.Alley.PlantVariables
            Report ReportAlley: same as BaseSim.BaseSim.Alley.ReportAlley
      Experiment Renwick
        DisabledSimNames=[Grape_Squire_1Irri70, Grape_Squire_1Irri80, Grape_SquireIrri20, Grape_SquireIrri40, Grape_SquireIrri70, Grape_SquireIrri80]
        Factors
          Factor Irri: Specification=[VineIrrigation]
            Operations 100
              2004-11-25  [DripIrrigator].Script.applyDripIrri(0.3);
              2004-12-02  [DripIrrigator].Script.applyDripIrri(32.3);
              2004-12-09  [DripIrrigator].Script.applyDripIrri(32.1);
              2004-12-23  [DripIrrigator].Script.applyDripIrri(10.6);
              2004-12-30  [DripIrrigator].Script.applyDripIrri(29.5);
              2005-01-06  [DripIrrigator].Script.applyDripIrri(9.4);
              2005-01-27  [DripIrrigator].Script.applyDripIrri(11.4);
              2005-02-03  [DripIrrigator].Script.applyDripIrri(12);
              2005-02-10  [DripIrrigator].Script.applyDripIrri(20.1);
              2005-02-17  [DripIrrigator].Script.applyDripIrri(32.1);
              2005-02-24  [DripIrrigator].Script.applyDripIrri(16);
              2005-03-03  [DripIrrigator].Script.applyDripIrri(24.1);
              2005-03-10  [DripIrrigator].Script.applyDripIrri(24.1);
              2005-03-17  [DripIrrigator].Script.applyDripIrri(23.9);
              2005-03-24  [DripIrrigator].Script.applyDripIrri(23.9);
              2005-03-31  [DripIrrigator].Script.applyDripIrri(15.9);
              2005-04-28  [DripIrrigator].Script.applyDripIrri(15.9);
              2005-11-03  [DripIrrigator].Script.applyDripIrri(0.8);
              2005-11-10  [DripIrrigator].Script.applyDripIrri(15.9);
              2005-11-17  [DripIrrigator].Script.applyDripIrri(15.9);
              2005-11-24  [DripIrrigator].Script.applyDripIrri(23.9);
              2005-12-01  [DripIrrigator].Script.applyDripIrri(23.6);
              2005-12-08  [DripIrrigator].Script.applyDripIrri(23.6);
              2005-12-15  [DripIrrigator].Script.applyDripIrri(15.9);
              2005-12-22  [DripIrrigator].Script.applyDripIrri(15.9);
              2005-12-29  [DripIrrigator].Script.applyDripIrri(35.5);
              2006-01-05  [DripIrrigator].Script.applyDripIrri(31.3);
              2006-01-12  [DripIrrigator].Script.applyDripIrri(32.4);
              2006-01-19  [DripIrrigator].Script.applyDripIrri(48.8);
              2006-01-26  [DripIrrigator].Script.applyDripIrri(8);
              2006-02-09  [DripIrrigator].Script.applyDripIrri(16);
              2006-02-16  [DripIrrigator].Script.applyDripIrri(16);
              2006-02-23  [DripIrrigator].Script.applyDripIrri(16);
              2006-03-02  [DripIrrigator].Script.applyDripIrri(24.1);
              2006-03-09  [DripIrrigator].Script.applyDripIrri(24.1);
              2006-03-16  [DripIrrigator].Script.applyDripIrri(24.1);
            Operations 50
              2004-11-25  [DripIrrigator].Script.applyDripIrri(0.5);
              2004-12-02  [DripIrrigator].Script.applyDripIrri(39.4);
              2004-12-09  [DripIrrigator].Script.applyDripIrri(21.5);
              2004-12-23  [DripIrrigator].Script.applyDripIrri(9.4);
              2004-12-30  [DripIrrigator].Script.applyDripIrri(20.4);
              2005-02-10  [DripIrrigator].Script.applyDripIrri(8.2);
              2005-02-17  [DripIrrigator].Script.applyDripIrri(16.2);
              2005-02-24  [DripIrrigator].Script.applyDripIrri(8);
              2005-03-03  [DripIrrigator].Script.applyDripIrri(8.2);
              2005-03-10  [DripIrrigator].Script.applyDripIrri(8.2);
              2005-03-17  [DripIrrigator].Script.applyDripIrri(8);
              2005-03-24  [DripIrrigator].Script.applyDripIrri(8.2);
              2005-11-03  [DripIrrigator].Script.applyDripIrri(0.9);
              2005-11-17  [DripIrrigator].Script.applyDripIrri(16.2);
              2005-11-24  [DripIrrigator].Script.applyDripIrri(24.2);
              2005-12-01  [DripIrrigator].Script.applyDripIrri(24.1);
              2005-12-08  [DripIrrigator].Script.applyDripIrri(23.9);
              2005-12-15  [DripIrrigator].Script.applyDripIrri(16);
              2005-12-22  [DripIrrigator].Script.applyDripIrri(15.9);
              2005-12-29  [DripIrrigator].Script.applyDripIrri(8.2);
              2006-01-05  [DripIrrigator].Script.applyDripIrri(9.3);
              2006-01-12  [DripIrrigator].Script.applyDripIrri(24.4);
              2006-01-19  [DripIrrigator].Script.applyDripIrri(9.9);
              2006-01-26  [DripIrrigator].Script.applyDripIrri(8);
              2006-02-09  [DripIrrigator].Script.applyDripIrri(8);
              2006-02-16  [DripIrrigator].Script.applyDripIrri(8);
              2006-02-23  [DripIrrigator].Script.applyDripIrri(8);
              2006-03-02  [DripIrrigator].Script.applyDripIrri(11.7);
              2006-03-09  [DripIrrigator].Script.applyDripIrri(12.3);
              2006-03-16  [DripIrrigator].Script.applyDripIrri(11.7);
            Operations 40
              2004-11-25  [DripIrrigator].Script.applyDripIrri(0.3);
              2004-12-02  [DripIrrigator].Script.applyDripIrri(15.1);
              2004-12-23  [DripIrrigator].Script.applyDripIrri(9.7);
              2005-02-17  [DripIrrigator].Script.applyDripIrri(15.7);
              2005-03-03  [DripIrrigator].Script.applyDripIrri(8);
              2005-03-10  [DripIrrigator].Script.applyDripIrri(7.9);
              2005-03-17  [DripIrrigator].Script.applyDripIrri(8);
              2005-03-24  [DripIrrigator].Script.applyDripIrri(8);
              2005-11-03  [DripIrrigator].Script.applyDripIrri(0.8);
              2005-11-24  [DripIrrigator].Script.applyDripIrri(23.6);
              2005-12-08  [DripIrrigator].Script.applyDripIrri(23.8);
              2005-12-15  [DripIrrigator].Script.applyDripIrri(15.7);
              2005-12-22  [DripIrrigator].Script.applyDripIrri(8);
              2005-12-29  [DripIrrigator].Script.applyDripIrri(15.7);
              2006-01-05  [DripIrrigator].Script.applyDripIrri(7.4);
              2006-01-12  [DripIrrigator].Script.applyDripIrri(16.5);
              2006-01-19  [DripIrrigator].Script.applyDripIrri(8);
              2006-01-26  [DripIrrigator].Script.applyDripIrri(8);
              2006-03-02  [DripIrrigator].Script.applyDripIrri(8);
              2006-03-09  [DripIrrigator].Script.applyDripIrri(8);
              2006-03-16  [DripIrrigator].Script.applyDripIrri(8);
            Operations 30
              2004-11-25  [DripIrrigator].Script.applyDripIrri(0.3);
              2004-12-23  [DripIrrigator].Script.applyDripIrri(10.2);
              2004-12-30  [DripIrrigator].Script.applyDripIrri(20.1);
              2005-02-24  [DripIrrigator].Script.applyDripIrri(8);
              2005-03-10  [DripIrrigator].Script.applyDripIrri(8.2);
              2005-03-24  [DripIrrigator].Script.applyDripIrri(8.2);
              2005-11-03  [DripIrrigator].Script.applyDripIrri(0.8);
              2005-11-24  [DripIrrigator].Script.applyDripIrri(22.1);
              2005-12-08  [DripIrrigator].Script.applyDripIrri(16);
              2005-12-29  [DripIrrigator].Script.applyDripIrri(12.7);
              2006-01-05  [DripIrrigator].Script.applyDripIrri(1.4);
              2006-01-12  [DripIrrigator].Script.applyDripIrri(16.8);
              2006-01-19  [DripIrrigator].Script.applyDripIrri(0.6);
              2006-03-02  [DripIrrigator].Script.applyDripIrri(8);
              2006-03-09  [DripIrrigator].Script.applyDripIrri(8);
              2006-03-16  [DripIrrigator].Script.applyDripIrri(8);
        Simulation Renwick
          Clock: Start=2002-02-25; End=2007-07-01
          Summary SummaryFile
          Weather: FileName=Site1004_RPC.met
          MicroClimate: a_interception=0; b_interception=1; c_interception=0; d_interception=0; soil_albedo=0.3; SoilHeatFluxFraction=0.4; MinimumHeightDiffForNewLayer=0; NightInterceptionFraction=0.5; ReferenceHeight=2
          SoilArbitrator Soil Arbitrator
          RectangularZone Row: Length=100; Width=0.9; Slope=0; AspectAngle=0; Altitude=50
            Report: EventNames=[Clock].DoReport
            Memo: same as BaseSim.BaseSim.Row.Memo
            Plant Grapevine
            Irrigation
            Fertiliser
            SurfaceOrganicMatter: InitialResidueName=wheat_stubble; InitialResidueType=wheat; InitialResidueMass=500; InitialStandingFraction=0; InitialCPR=0; InitialCNR=100
            Soil: Latitude=0; Longitude=0
              LayerStructure: Thickness=[200, 200, 200, 200, 200, 200, 400, 400, 400, 600]
              Chemical: same as BaseSim.BaseSim.Row.Soil.Chemical
              InitialWater Initial water: PercentMethod=1; FractionFull=1; RelativeTo=LL15
              Physical
                Thickness  BD    AirDry  LL15  DUL   SAT
                200        1.35  0.1     0.12  0.3   0.32
                300        1.35  0.1     0.12  0.27  0.32
                300        1.4   0.1     0.12  0.16  0.2
                200        1.4   0.1     0.11  0.14  0.2
                200        1.4   0.08    0.08  0.12  0.2
                1800       1.59  0.06    0.08  0.12  0.2
                SoilCrop GrapevineSoil: LL=[0.12, 0.12, 0.12, 0.11, 0.08, 0.08]; KL=[0.25, 0.1, 0.08, 0.05, 0.05, 0.01]; XF=[1, 1, 1, 1, 1, 1]
                SoilCrop SlurpSoil: LL=[0.12, 0.12, 0.12, 0.11, 0.08, 0.08]; KL=[0.11, 0.11, 0.11, 0.11, 0.11, 0.11]; XF=[1, 1, 1, 1, 1, 1]
              WaterBalance SoilWater: same as BaseSim.BaseSim.Row.Soil.SoilWater
              SoilNitrogen: same as BaseSim.BaseSim.Row.Soil.SoilNitrogen
              Organic: same as BaseSim.BaseSim.Row.Soil.Organic
              CERESSoilTemperature Temperature
              OutputLayers: Thickness=[200, 100, 100, 100, 100, 200, 200, 200]
            Manager SetupTreeRootZones: same as BaseSim.BaseSim.Row.SetupTreeRootZones
            Operations VineIrrigation
            Operations WinterRainfall
              2002-05-28  [Irrigation].Apply(200);
            Manager PlantVariables: same as Validation.Sauvignonblanc.Grape_RPC_1.RPC_1.Row.PlantVariables
            Manager DripIrrigator: same as BaseSim.BaseSim.Row.DripIrrigator
            Manager TreeInitialisation: same as Validation.Sauvignonblanc.Grape_RPC_2.RPC_2.Row.TreeInitialisation
            Manager HarvestNPruning: same as Validation.Sauvignonblanc.Grape_RPC_1.RPC_1.Row.HarvestNPruning
          RectangularZone Alley: Length=100; Width=1.8; Slope=0; AspectAngle=0; Altitude=50
            SurfaceOrganicMatter: InitialResidueName=wheat_stubble; InitialResidueType=wheat; InitialResidueMass=500; InitialStandingFraction=0; InitialCPR=0; InitialCNR=100
            Plant Slurp
            Fertiliser
            Irrigation
            Manager PastureInitialisation: same as Validation.Sauvignonblanc.Grape_RPC_2.RPC_2.Alley.PastureInitialisation
            Manager SetPastureVariables: same as BaseSim.BaseSim.Alley.SetPastureVariables
            Manager SetupPastureRootZones: same as BaseSim.BaseSim.Alley.SetupPastureRootZones
            Operations WinterRainfall
              2002-05-28  [Irrigation].Apply(200);
            Manager PlantVariables: same as Validation.Sauvignonblanc.Grape_RPC_1.RPC_1.Alley.PlantVariables
            Soil: same as Validation.Sauvignonblanc.Renwick.Renwick.Row.Soil
            Report ReportAlley: same as BaseSim.BaseSim.Alley.ReportAlley
      Simulation Seaview_2Cane
        Clock: Start=2006-02-25; End=2007-07-01
        Summary SummaryFile
        Weather: FileName=Site1003_SEA.met
        MicroClimate: a_interception=0; b_interception=1; c_interception=0; d_interception=0; soil_albedo=0.3; SoilHeatFluxFraction=0.4; MinimumHeightDiffForNewLayer=0; NightInterceptionFraction=0.5; ReferenceHeight=2
        SoilArbitrator Soil Arbitrator
        RectangularZone Row: Length=100; Width=0.9; Slope=0; AspectAngle=0; Altitude=50
          Report: EventNames=[Clock].DoReport
          Memo: same as BaseSim.BaseSim.Row.Memo
          Plant Grapevine
          Irrigation
          Fertiliser
          SurfaceOrganicMatter: InitialResidueName=wheat_stubble; InitialResidueType=wheat; InitialResidueMass=500; InitialStandingFraction=0; InitialCPR=0; InitialCNR=100
          Manager SetupTreeRootZones: same as BaseSim.BaseSim.Row.SetupTreeRootZones
          Operations VineIrrigation
          Operations WinterRainfall
            2006-08-26  [Irrigation].Apply(45);
          Manager PlantVariables: same as Validation.Sauvignonblanc.Grape_RPC_1.RPC_1.Row.PlantVariables
          Manager DripIrrigator: same as BaseSim.BaseSim.Row.DripIrrigator
          Soil: Latitude=0; Longitude=0
            LayerStructure: Thickness=[200, 200, 200, 200, 200, 200, 400, 400, 400, 600]
            Chemical: same as Validation.Sauvignonblanc.RetainedNodeNum.RetainedNodNum.Row.Soil.Chemical
            Physical: same as Validation.Sauvignonblanc.RetainedNodeNum.RetainedNodNum.Row.Soil.Physical
            WaterBalance SoilWater: same as Validation.Sauvignonblanc.RetainedNodeNum.RetainedNodNum.Row.Soil.SoilWater
            SoilNitrogen: same as BaseSim.BaseSim.Row.Soil.SoilNitrogen
            Organic: same as BaseSim.BaseSim.Row.Soil.Organic
            CERESSoilTemperature Temperature
            OutputLayers: Thickness=[300, 300, 300]
            InitialWater: PercentMethod=0; FractionFull=1
          Manager HarvestNPruning: same as Validation.Sauvignonblanc.Grape_RPC_1.RPC_1.Row.HarvestNPruning
          Manager TreeInitialisation
            CultivarName = SauvignonBlanc
            SowingDate = 02/25/2006 00:00:00
            VineDistance = 1.8
            BudNumber = 24
            CordonNumber = 2
            CordonDiameter = 10
            CordonLength = 0.9
            TrunkDiameter = 65
            TrunkLength = 0.8
            RootTrunkRatio = 1
            RootNSC = 0.2
            TrunkNSC = 0.2
            CordonNSC = 0.2
            StartAge = 3
            script: same as in Validation.Sauvignonblanc.RetainedNodeNum.RetainedNodNum.Row.TreeInitialisation
        RectangularZone Alley: Length=100; Width=1.5; Slope=0; AspectAngle=0; Altitude=50
          SurfaceOrganicMatter: InitialResidueName=wheat_stubble; InitialResidueType=wheat; InitialResidueMass=500; InitialStandingFraction=0; InitialCPR=0; InitialCNR=100
          Plant Slurp
          Fertiliser
          Irrigation
          Manager PastureInitialisation
            CultivarName = StaticCrop
            InitialRootDepth = 2000
            SowingDate = 02/25/2006 00:00:00
            RootDepth = 2000
            RFV = 10
            KLReductionFactor = -0.001
            KLReductionDepth = 150
            YKLModifiers =
            XDepth =
            MaxG = 0.004
            R50 = 150
            script: same as in BaseSim.BaseSim.Alley.PastureInitialisation
          Manager SetPastureVariables: same as BaseSim.BaseSim.Alley.SetPastureVariables
          Manager SetupPastureRootZones: same as BaseSim.BaseSim.Alley.SetupPastureRootZones
          Operations WinterRainfall
            2006-08-26  [Irrigation].Apply(45);
          Manager PlantVariables: same as Validation.Sauvignonblanc.Grape_RPC_1.RPC_1.Alley.PlantVariables
          Soil: same as Validation.Sauvignonblanc.RetainedNodeNum.RetainedNodNum.Alley.Soil
          Report ReportAlley: same as BaseSim.BaseSim.Alley.ReportAlley
      Simulation Seaview_4Cane
        Clock: Start=2006-02-25; End=2007-07-01
        Summary SummaryFile
        Weather: FileName=Site1003_SEA.met
        MicroClimate: a_interception=0; b_interception=1; c_interception=0; d_interception=0; soil_albedo=0.3; SoilHeatFluxFraction=0.4; MinimumHeightDiffForNewLayer=0; NightInterceptionFraction=0.5; ReferenceHeight=2
        SoilArbitrator Soil Arbitrator
        RectangularZone Row: Length=100; Width=0.9; Slope=0; AspectAngle=0; Altitude=50
          Report: EventNames=[Clock].DoReport
          Memo: same as BaseSim.BaseSim.Row.Memo
          Plant Grapevine
          Irrigation
          Fertiliser
          SurfaceOrganicMatter: InitialResidueName=wheat_stubble; InitialResidueType=wheat; InitialResidueMass=500; InitialStandingFraction=0; InitialCPR=0; InitialCNR=100
          Manager SetupTreeRootZones: same as BaseSim.BaseSim.Row.SetupTreeRootZones
          Operations VineIrrigation
          Operations WinterRainfall
            2006-08-26  [Irrigation].Apply(45);
          Manager PlantVariables: same as Validation.Sauvignonblanc.Grape_RPC_1.RPC_1.Row.PlantVariables
          Manager DripIrrigator: same as BaseSim.BaseSim.Row.DripIrrigator
          Soil: same as Validation.Sauvignonblanc.Seaview_2Cane.Row.Soil
          Manager HarvestNPruning: same as Validation.Sauvignonblanc.Grape_RPC_1.RPC_1.Row.HarvestNPruning
          Manager TreeInitialisation
            CultivarName = SauvignonBlanc
            SowingDate = 02/25/2006 00:00:00
            VineDistance = 1.8
            BudNumber = 40
            CordonNumber = 4
            CordonDiameter = 10
            CordonLength = 0.9
            TrunkDiameter = 65
            TrunkLength = 0.8
            RootTrunkRatio = 1
            RootNSC = 0.2
            TrunkNSC = 0.2
            CordonNSC = 0.2
            StartAge = 3
            script: same as in Validation.Sauvignonblanc.RetainedNodeNum.RetainedNodNum.Row.TreeInitialisation
        RectangularZone Alley: same as Validation.Sauvignonblanc.Seaview_2Cane.Alley
      Simulation Seaview_4Cane08
        Clock: Start=2007-02-25; End=2008-07-01
        Summary SummaryFile
        Weather: FileName=Site1003_SEA.met
        MicroClimate: a_interception=0; b_interception=1; c_interception=0; d_interception=0; soil_albedo=0.3; SoilHeatFluxFraction=0.4; MinimumHeightDiffForNewLayer=0; NightInterceptionFraction=0.5; ReferenceHeight=2
        SoilArbitrator Soil Arbitrator
        RectangularZone Row: Length=100; Width=0.9; Slope=0; AspectAngle=0; Altitude=50
          Report: EventNames=[Clock].DoReport
          Memo: same as BaseSim.BaseSim.Row.Memo
          Plant Grapevine
          Irrigation
          Fertiliser
          SurfaceOrganicMatter: InitialResidueName=wheat_stubble; InitialResidueType=wheat; InitialResidueMass=500; InitialStandingFraction=0; InitialCPR=0; InitialCNR=100
          Manager SetupTreeRootZones: same as BaseSim.BaseSim.Row.SetupTreeRootZones
          Operations VineIrrigation
          Operations WinterRainfall
            2006-08-26  [Irrigation].Apply(45);
          Manager PlantVariables: same as Validation.Sauvignonblanc.Grape_RPC_1.RPC_1.Row.PlantVariables
          Manager DripIrrigator: same as BaseSim.BaseSim.Row.DripIrrigator
          Soil: Latitude=0; Longitude=0
            LayerStructure: Thickness=[200, 200, 200, 200, 200, 200, 400, 400, 400, 600]
            Chemical
              Thickness  NO3N     NH4N  PH
              100        160.741  0     6.6
              200        11.1111  0     6.2
              300        1.19048  0     5.7
              300        1.19048  0     5.5
              300        0        0     5.5
              300        0        0     5.5
            Physical
              Thickness  BD    AirDry  LL15  DUL   SAT
              300        1.35  0.06    0.12  0.3   0.4
              300        1.4   0.1     0.12  0.3   0.4
              300        1.4   0.005   0.16  0.3   0.4
              300        1.4   0.05    0.05  0.28  0.35
              1950       1.5   0.06    0.06  0.15  0.3
              SoilCrop GrapevineSoil: LL=[0.12, 0.12, 0.16, 0.05, 0.06]; KL=[0.12, 0.04, 0.03, 0.03, 0.02]; XF=[1, 1, 1, 1, 1]
              SoilCrop SlurpSoil: LL=[0.12, 0.12, 0.16, 0.05, 0.06]; KL=[0.11, 0.11, 0.11, 0.11, 0.11]; XF=[1, 1, 1, 1, 1]
            WaterBalance SoilWater: same as BaseSim.BaseSim.Row.Soil.SoilWater
            SoilNitrogen: same as BaseSim.BaseSim.Row.Soil.SoilNitrogen
            Organic: same as BaseSim.BaseSim.Row.Soil.Organic
            CERESSoilTemperature Temperature
            OutputLayers: Thickness=[300, 300, 300]
            InitialWater: PercentMethod=1; FractionFull=1
          Manager HarvestNPruning: same as Validation.Sauvignonblanc.Grape_RPC_1.RPC_1.Row.HarvestNPruning
          Manager TreeInitialisation
            CultivarName = SauvignonBlanc
            SowingDate = 02/25/2007 00:00:00
            VineDistance = 1.8
            BudNumber = 48
            CordonNumber = 4
            CordonDiameter = 10
            CordonLength = 0.9
            TrunkDiameter = 40
            TrunkLength = 0.8
            RootTrunkRatio = 1
            RootNSC = 0.2
            TrunkNSC = 0.2
            CordonNSC = 0.2
            StartAge = 3
            script: same as in Validation.Sauvignonblanc.RetainedNodeNum.RetainedNodNum.Row.TreeInitialisation
        RectangularZone Alley: Length=100; Width=1.5; Slope=0; AspectAngle=0; Altitude=50
          SurfaceOrganicMatter: InitialResidueName=wheat_stubble; InitialResidueType=wheat; InitialResidueMass=500; InitialStandingFraction=0; InitialCPR=0; InitialCNR=100
          Plant Slurp
          Fertiliser
          Irrigation
          Manager PastureInitialisation
            CultivarName = StaticCrop
            InitialRootDepth = 2000
            SowingDate = 02/25/2007 00:00:00
            RootDepth = 2000
            RFV = 10
            KLReductionFactor = -0.001
            KLReductionDepth = 150
            YKLModifiers =
            XDepth =
            MaxG = 0.004
            R50 = 150
            script: same as in BaseSim.BaseSim.Alley.PastureInitialisation
          Manager SetPastureVariables: same as BaseSim.BaseSim.Alley.SetPastureVariables
          Manager SetupPastureRootZones: same as BaseSim.BaseSim.Alley.SetupPastureRootZones
          Operations WinterRainfall
            2006-08-26  [Irrigation].Apply(45);
          Manager PlantVariables: same as Validation.Sauvignonblanc.Grape_RPC_1.RPC_1.Alley.PlantVariables
          Soil: Latitude=0; Longitude=0
            LayerStructure: Thickness=[200, 200, 200, 200, 200, 200, 400, 400, 400, 600]
            Chemical: same as Validation.Sauvignonblanc.Seaview_4Cane08.Row.Soil.Chemical
            WaterBalance SoilWater: same as BaseSim.BaseSim.Row.Soil.SoilWater
            SoilNitrogen: same as BaseSim.BaseSim.Row.Soil.SoilNitrogen
            Organic: same as BaseSim.BaseSim.Row.Soil.Organic
            CERESSoilTemperature Temperature
            OutputLayers: Thickness=[300, 300, 300]
            InitialWater: PercentMethod=1; FractionFull=1
            Physical: same as Validation.Sauvignonblanc.Seaview_4Cane08.Row.Soil.Physical
          Report ReportAlley: same as BaseSim.BaseSim.Alley.ReportAlley
      Experiment OtherRegions
        Factors
          Factor Climate
            Specification=[Weather].FileName = Longlands.met, WAP.met, TOH.met, Dashwood.met, WRV.met
        Simulation OtherRegions
          Weather: FileName=WRV.met
          Clock: Start=2014-02-25; End=2020-05-01
          Summary
          SoilArbitrator Soil Arbitrator
          MicroClimate: a_interception=0; b_interception=1; c_interception=0; d_interception=0; soil_albedo=0.23; SoilHeatFluxFraction=0.4; MinimumHeightDiffForNewLayer=0; NightInterceptionFraction=0.5; ReferenceHeight=2
          RectangularZone Row: Length=100; Width=0.9; Slope=0; AspectAngle=0; Altitude=50
            Report: EventNames=[Clock].DoReport
            Memo: same as BaseSim.BaseSim.Row.Memo
            Plant Grapevine
            Irrigation
            Fertiliser
            SurfaceOrganicMatter: InitialResidueName=wheat_stubble; InitialResidueType=wheat; InitialResidueMass=500; InitialStandingFraction=0; InitialCPR=0; InitialCNR=100
            Soil: same as BaseSim.BaseSim.Row.Soil
            Manager SetupTreeRootZones: same as BaseSim.BaseSim.Row.SetupTreeRootZones
            Operations VineIrrigation
            Operations WinterRainfall
              2002-05-28  [Irrigation].Apply(200);
            Manager PlantVariables: same as Validation.Sauvignonblanc.Grape_RPC_1.RPC_1.Row.PlantVariables
            Manager DripIrrigator: same as BaseSim.BaseSim.Row.DripIrrigator
            Manager HarvestNPruning: same as Validation.Sauvignonblanc.Grape_RPC_1.RPC_1.Row.HarvestNPruning
            Manager TreeInitialisation
              CultivarName = SauvignonBlanc
              SowingDate = 02/25/2014 00:00:00
              VineDistance = 1.8
              BudNumber = 48
              CordonNumber = 4
              CordonDiameter = 10
              CordonLength = 0.9
              TrunkDiameter = 40
              TrunkLength = 0.8
              RootTrunkRatio = 1
              RootNSC = 0.2
              TrunkNSC = 0.2
              CordonNSC = 0.2
              StartAge = 3
              script: same as in Validation.Sauvignonblanc.RetainedNodeNum.RetainedNodNum.Row.TreeInitialisation
          RectangularZone Alley: Length=100; Width=1.5; Slope=0; AspectAngle=0; Altitude=50
            Manager PastureInitialisation
              CultivarName = StaticCrop
              InitialRootDepth = 2000
              SowingDate = 02/25/2014 00:00:00
              RootDepth = 2000
              RFV = 10
              KLReductionFactor = -0.001
              KLReductionDepth = 150
              YKLModifiers =
              XDepth =
              MaxG = 0.004
              R50 = 150
              script: same as in BaseSim.BaseSim.Alley.PastureInitialisation
            SurfaceOrganicMatter: InitialResidueName=wheat_stubble; InitialResidueType=wheat; InitialResidueMass=500; InitialStandingFraction=0; InitialCPR=0; InitialCNR=100
            Plant Slurp
            Fertiliser
            Irrigation
            Manager SetPastureVariables: same as BaseSim.BaseSim.Alley.SetPastureVariables
            Manager SetupPastureRootZones: same as BaseSim.BaseSim.Alley.SetupPastureRootZones
            Soil: same as BaseSim.BaseSim.Alley.Soil
            Operations WinterRainfall
              2002-05-28  [Irrigation].Apply(200);
            Manager PlantVariables
              script: same as in BaseSim.BaseSim.Alley.PlantVariables
            Report ReportAlley: same as BaseSim.BaseSim.Alley.ReportAlley
      Experiment Marlborough_3Cane
        Factors
          Factor Climate: Specification=[Weather].FileName = TOH.met, WRV.met
        Simulation MRL3Cane
          Weather: FileName=Site1003_SEA.met
          Clock: Start=2014-02-25; End=2020-05-01
          Summary
          SoilArbitrator Soil Arbitrator
          MicroClimate: a_interception=0; b_interception=1; c_interception=0; d_interception=0; soil_albedo=0.23; SoilHeatFluxFraction=0.4; MinimumHeightDiffForNewLayer=0; NightInterceptionFraction=0.5; ReferenceHeight=2
          RectangularZone Row: Length=100; Width=0.9; Slope=0; AspectAngle=0; Altitude=50
            Report: EventNames=[Clock].DoReport
            Memo: same as BaseSim.BaseSim.Row.Memo
            Plant Grapevine
            Manager TreeInitialisation
              CultivarName = SauvignonBlanc
              SowingDate = 02/25/2014 00:00:00
              VineDistance = 1.8
              BudNumber = 32
              CordonNumber = 3
              CordonDiameter = 10
              CordonLength = 0.9
              TrunkDiameter = 65
              TrunkLength = 0.8
              RootTrunkRatio = 1
              RootNSC = 0.2
              TrunkNSC = 0.2
              CordonNSC = 0.2
              StartAge = 8
              script: same as in Validation.Sauvignonblanc.RetainedNodeNum.RetainedNodNum.Row.TreeInitialisation
            Irrigation
            Fertiliser
            SurfaceOrganicMatter: InitialResidueName=wheat_stubble; InitialResidueType=wheat; InitialResidueMass=500; InitialStandingFraction=0; InitialCPR=0; InitialCNR=100
            Soil: same as BaseSim.BaseSim.Row.Soil
            Manager SetupTreeRootZones: same as Validation.Sauvignonblanc.RetainedNodeNum.RetainedNodNum.Row.SetupTreeRootZones
            Operations VineIrrigation
            Operations WinterRainfall
              2002-05-28  [Irrigation].Apply(200);
            Manager PlantVariables: same as Validation.Sauvignonblanc.Marlborough_4Cane.VineFacts2.Row.PlantVariables
            Manager DripIrrigator: same as Validation.Sauvignonblanc.Marlborough_4Cane.VineFacts2.Row.DripIrrigator
            Manager HarvestNPruning: same as Validation.Sauvignonblanc.RetainedNodeNum.RetainedNodNum.Row.HarvestNPruning
          RectangularZone Alley: Length=100; Width=1.5; Slope=0; AspectAngle=0; Altitude=50
            SurfaceOrganicMatter: InitialResidueName=wheat_stubble; InitialResidueType=wheat; InitialResidueMass=500; InitialStandingFraction=0; InitialCPR=0; InitialCNR=100
            Plant Slurp
            Fertiliser
            Irrigation
            Manager PastureInitialisation
              CultivarName = StaticCrop
              InitialRootDepth = 2000
              SowingDate = 02/25/2014 00:00:00
              RootDepth = 2000
              RFV = 10
              KLReductionFactor = -0.001
              KLReductionDepth = 150
              YKLModifiers =
              XDepth =
              MaxG = 0.004
              R50 = 150
              script: same as in Validation.Sauvignonblanc.RetainedNodeNum.RetainedNodNum.Alley.PastureInitialisation
            Manager SetPastureVariables: same as Validation.Sauvignonblanc.RetainedNodeNum.RetainedNodNum.Alley.SetPastureVariables
            Manager SetupPastureRootZones: same as Validation.Sauvignonblanc.RetainedNodeNum.RetainedNodNum.Alley.SetupPastureRootZones
            Soil: same as BaseSim.BaseSim.Alley.Soil
            Operations WinterRainfall
              2002-05-28  [Irrigation].Apply(200);
            Manager PlantVariables
              script: same as in BaseSim.BaseSim.Alley.PlantVariables
            Report ReportAlley: same as BaseSim.BaseSim.Alley.ReportAlley
    Folder Chardonnay
      Experiment Chardonnay
        Factors
          Factor Climate
            Specification=[Weather].FileName = Dashwood.met, Crownthorpe.met, LawnRoad.met, Hexton.met, Site1002_OYB.met, Matawhero.met
        Simulation Chardonnay
          Weather: FileName=Site1001_BRA.met
          Clock: Start=2014-02-25; End=2020-05-01
          Summary
          SoilArbitrator Soil Arbitrator
          MicroClimate: a_interception=0; b_interception=1; c_interception=0; d_interception=0; soil_albedo=0.23; SoilHeatFluxFraction=0.4; MinimumHeightDiffForNewLayer=0; NightInterceptionFraction=0.5; ReferenceHeight=2
          RectangularZone Row: Length=100; Width=0.9; Slope=0; AspectAngle=0; Altitude=50
            Memo: same as BaseSim.BaseSim.Row.Memo
            Report: EventNames=[Clock].DoReport
            Plant Grapevine
            Irrigation
            Fertiliser
            SurfaceOrganicMatter: InitialResidueName=wheat_stubble; InitialResidueType=wheat; InitialResidueMass=500; InitialStandingFraction=0; InitialCPR=0; InitialCNR=100
            Soil: same as BaseSim.BaseSim.Row.Soil
            Manager SetupTreeRootZones: same as BaseSim.BaseSim.Row.SetupTreeRootZones
            Operations VineIrrigation
            Operations WinterRainfall
              2002-05-28  [Irrigation].Apply(200);
            Manager PlantVariables: same as Validation.Sauvignonblanc.Grape_RPC_1.RPC_1.Row.PlantVariables
            Manager DripIrrigator: same as BaseSim.BaseSim.Row.DripIrrigator
            Manager TreeInitialisation
              CultivarName = Chardonnay
              SowingDate = 02/25/2014 00:00:00
              VineDistance = 1.8
              BudNumber = 48
              CordonNumber = 4
              CordonDiameter = 10
              CordonLength = 0.9
              TrunkDiameter = 40
              TrunkLength = 0.8
              RootTrunkRatio = 1
              RootNSC = 0.2
              TrunkNSC = 0.2
              CordonNSC = 0.2
              StartAge = 3
              script: same as in Validation.Sauvignonblanc.RetainedNodeNum.RetainedNodNum.Row.TreeInitialisation
            Manager HarvestNPruning: same as Validation.Sauvignonblanc.Grape_RPC_1.RPC_1.Row.HarvestNPruning
          RectangularZone Alley: Length=100; Width=1.5; Slope=0; AspectAngle=0; Altitude=50
            Report ReportAlley: EventNames=[Row].Grapevine.Pruning
              VariableNames:
                [Clock].Today
                [Clock].Today.Year
                [Clock].Today.DayOfYear
                [Weather].DaysSinceWinterSolstice as DAWS
            SurfaceOrganicMatter: InitialResidueName=wheat_stubble; InitialResidueType=wheat; InitialResidueMass=500; InitialStandingFraction=0; InitialCPR=0; InitialCNR=100
            Plant Slurp
            Fertiliser
            Irrigation
            Manager PastureInitialisation: same as Validation.Sauvignonblanc.OtherRegions.OtherRegions.Alley.PastureInitialisation
            Manager SetPastureVariables: same as BaseSim.BaseSim.Alley.SetPastureVariables
            Manager SetupPastureRootZones: same as BaseSim.BaseSim.Alley.SetupPastureRootZones
            Soil: same as BaseSim.BaseSim.Alley.Soil
            Operations WinterRainfall
              2002-05-28  [Irrigation].Apply(200);
            Manager PlantVariables
              script: same as in BaseSim.BaseSim.Alley.PlantVariables
    Folder Merlot
      Experiment Merlot
        Factors
          Factor Climate: Specification=[Weather].FileName = Longlands.met, Twyford.met
        Simulation Merlot
          Weather: FileName=LongLands.met
          Clock: Start=2014-02-25; End=2020-05-01
          Summary
          SoilArbitrator Soil Arbitrator
          MicroClimate: a_interception=0; b_interception=1; c_interception=0; d_interception=0; soil_albedo=0.23; SoilHeatFluxFraction=0.4; MinimumHeightDiffForNewLayer=0; NightInterceptionFraction=0.5; ReferenceHeight=2
          RectangularZone Row: Length=100; Width=0.9; Slope=0; AspectAngle=0; Altitude=50
            Memo: same as BaseSim.BaseSim.Row.Memo
            Report: EventNames=[Clock].DoReport
            Plant Grapevine
            Irrigation
            Fertiliser
            SurfaceOrganicMatter: InitialResidueName=wheat_stubble; InitialResidueType=wheat; InitialResidueMass=500; InitialStandingFraction=0; InitialCPR=0; InitialCNR=100
            Soil: same as BaseSim.BaseSim.Row.Soil
            Manager SetupTreeRootZones: same as BaseSim.BaseSim.Row.SetupTreeRootZones
            Operations VineIrrigation
            Operations WinterRainfall
              2002-05-28  [Irrigation].Apply(200);
            Manager PlantVariables: same as Validation.Sauvignonblanc.Grape_RPC_1.RPC_1.Row.PlantVariables
            Manager DripIrrigator: same as BaseSim.BaseSim.Row.DripIrrigator
            Manager TreeInitialisation
              CultivarName = Merlot
              SowingDate = 02/25/2014 00:00:00
              VineDistance = 1.8
              BudNumber = 48
              CordonNumber = 4
              CordonDiameter = 10
              CordonLength = 0.9
              TrunkDiameter = 40
              TrunkLength = 0.8
              RootTrunkRatio = 1
              RootNSC = 0.2
              TrunkNSC = 0.2
              CordonNSC = 0.2
              StartAge = 3
              script: same as in Validation.Sauvignonblanc.RetainedNodeNum.RetainedNodNum.Row.TreeInitialisation
            Manager HarvestNPruning: same as Validation.Sauvignonblanc.Grape_RPC_1.RPC_1.Row.HarvestNPruning
          RectangularZone Alley: same as Validation.Chardonnay.Chardonnay.Chardonnay.Alley
    Folder PinotNoir
      Experiment PinotNoir
        Factors
          Factor Climate
            Specification=[Weather].FileName = Site1001_BRA.met, Site1003_SEA.met, WAP.met, McArthur.met, Bannockburn.met, Gibbston.met, Pisa.met
        Simulation PinotNoir
          Weather: FileName=Pisa.met
          Clock: Start=2014-02-25; End=2020-05-01
          Summary
          SoilArbitrator Soil Arbitrator
          MicroClimate: a_interception=0; b_interception=1; c_interception=0; d_interception=0; soil_albedo=0.23; SoilHeatFluxFraction=0.4; MinimumHeightDiffForNewLayer=0; NightInterceptionFraction=0.5; ReferenceHeight=2
          RectangularZone Row: Length=100; Width=0.9; Slope=0; AspectAngle=0; Altitude=50
            Memo: same as BaseSim.BaseSim.Row.Memo
            Report: EventNames=[Clock].DoReport
            Plant Grapevine
            Irrigation
            Fertiliser
            SurfaceOrganicMatter: InitialResidueName=wheat_stubble; InitialResidueType=wheat; InitialResidueMass=500; InitialStandingFraction=0; InitialCPR=0; InitialCNR=100
            Soil: same as BaseSim.BaseSim.Row.Soil
            Manager SetupTreeRootZones: same as BaseSim.BaseSim.Row.SetupTreeRootZones
            Operations VineIrrigation
            Operations WinterRainfall
              2002-05-28  [Irrigation].Apply(200);
            Manager PlantVariables: same as Validation.Sauvignonblanc.Grape_RPC_1.RPC_1.Row.PlantVariables
            Manager DripIrrigator: same as BaseSim.BaseSim.Row.DripIrrigator
            Manager TreeInitialisation
              CultivarName = PinotNoir
              SowingDate = 02/25/2014 00:00:00
              VineDistance = 1.8
              BudNumber = 48
              CordonNumber = 4
              CordonDiameter = 10
              CordonLength = 0.9
              TrunkDiameter = 40
              TrunkLength = 0.8
              RootTrunkRatio = 1
              RootNSC = 0.2
              TrunkNSC = 0.2
              CordonNSC = 0.2
              StartAge = 3
              script: same as in Validation.Sauvignonblanc.RetainedNodeNum.RetainedNodNum.Row.TreeInitialisation
            Manager HarvestNPruning: same as Validation.Sauvignonblanc.Grape_RPC_1.RPC_1.Row.HarvestNPruning
          RectangularZone Alley: Length=100; Width=1.5; Slope=0; AspectAngle=0; Altitude=50
            Report ReportAlley: EventNames=[Row].Grapevine.Pruning
              VariableNames:
                [Clock].Today
                [Clock].Today.Year
                [Clock].Today.DayOfYear
                [Weather].DaysSinceWinterSolstice as DAWS
            SurfaceOrganicMatter: InitialResidueName=wheat_stubble; InitialResidueType=wheat; InitialResidueMass=500; InitialStandingFraction=0; InitialCPR=0; InitialCNR=100
            Plant Slurp
            Fertiliser
            Irrigation
            Manager PastureInitialisation
              CultivarName = StaticCrop
              InitialRootDepth = 2000
              SowingDate = 01/01/2014 00:00:00
              RootDepth = 2000
              RFV = 10
              KLReductionFactor = -0.001
              KLReductionDepth = 150
              YKLModifiers =
              XDepth =
              MaxG = 0.004
              R50 = 150
              script: same as in BaseSim.BaseSim.Alley.PastureInitialisation
            Manager SetPastureVariables: same as BaseSim.BaseSim.Alley.SetPastureVariables
            Manager SetupPastureRootZones: same as BaseSim.BaseSim.Alley.SetupPastureRootZones
            Soil: same as BaseSim.BaseSim.Alley.Soil
            Operations WinterRainfall
              2002-05-28  [Irrigation].Apply(200);
            Manager PlantVariables
              script: same as in BaseSim.BaseSim.Alley.PlantVariables
    Folder PinotGris
      Experiment PinotGris
        Factors
          Factor Climate
            Specification=[Weather].FileName = Crownthorpe.met, Site1003_SEA.met, Site1004_RPC.met
        Simulation PinotGris
          Weather: FileName=LongLands.met
          Clock: Start=2014-02-25; End=2020-05-01
          Summary
          SoilArbitrator Soil Arbitrator
          MicroClimate: a_interception=0; b_interception=1; c_interception=0; d_interception=0; soil_albedo=0.23; SoilHeatFluxFraction=0.4; MinimumHeightDiffForNewLayer=0; NightInterceptionFraction=0.5; ReferenceHeight=2
          RectangularZone Row: same as Validation.PinotNoir.PinotNoir.PinotNoir.Row
          RectangularZone Alley: same as Validation.Chardonnay.Chardonnay.Chardonnay.Alley
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