Simulations: Version=195
  Memo TitlePage
    # The APSIM Wheat Model

    _Brown, H.E., Huth, N.I. and Holzworth, D.P._
  Memo Introduction
    The APSIM wheat model has been developed using the Plant Modelling Framework (PMF) of [brown_plant_2014]. This new framework provides a library of plant organ and process submodels that can be coupled, at runtime, to construct a model in much the same way that models can be coupled to construct a simulation. This means that dynamic composition of lower level process and organ classes (e.g. photosynthesis, leaf) into larger constructions (e.g. maize, wheat, sorghum) can be achieved by the model developer without additional coding.

    The wheat model consists of:

    * a phenology model to simulate development through sequential growth phases
    * a structure model to simulate plant morphology
    * a collection of organs to simulate the various plant parts
    * an arbitrator to allocate resources (N, biomass) to the various plant organs

    This work builds upon earlier APSIM Wheat models such as NWheat ([Asseng200225], [KeatingNWheat]), NWheatS ([Asseng1998163]), Cropmod-Wheat ([Wang2002GenericCropModel]) , and the earlier versions developed within the Plant Modelling Framework ([brown_plant_2014]).
  Folder Replacements
    Plant Wheat: PlantType=Wheat
      Memo TitlePage
        # The APSIM Wheat Model

        _Brown, H.E., Huth, N.I. and Holzworth, D.P._

        The APSIM wheat model has been developed using the Plant Modelling Framework (PMF) of [brown_plant_2014]. This new framework provides a library of plant organ and process submodels that can be coupled, at runtime, to construct a model in much the same way that models can be coupled to construct a simulation. This means that dynamic composition of lower level process and organ classes (e.g. photosynthesis, leaf) into larger constructions (e.g. maize, wheat, sorghum) can be achieved by the model developer without additional coding.

        The model consists of:

        * a phenology model to simulate development between growth phases
        * a structure model to simulate plant morphology
        * a collection of organs to simulate the various plant parts
        * an arbitrator to allocate resources (N, biomass) to the various plant organs
      OrganArbitrator Arbitrator
        BiomassTypeArbitrator DMArbitration
          Folder PotentialPartitioningMethods
            ReallocationMethod
            AllocateFixationMethod
            RetranslocationMethod
            SendPotentialDMAllocationsMethod
          Folder AllocationMethods
            NutrientConstrainedAllocationMethod
            DryMatterAllocationsMethod
          RelativeAllocation ArbitrationMethod
        BiomassTypeArbitrator NArbitration
          Folder PotentialPartitioningMethods
            ReallocationMethod
          Folder ActualPartitioningMethods
            AllocateFixationMethod
            RetranslocationMethod
          Folder AllocationMethods
            NitrogenAllocationsMethod
          RelativeAllocation ArbitrationMethod
          AllocateUptakesMethod
        WaterUptakeMethod
        NitrogenUptakeMethod
      Phenology
        Memo
          Wheat exhibits a range of developmental responses to environment and these are strongly influences by genotype characteristics.
          Temperature effects development and it effects are captured by thermal time, incrasing development rates and decreasing phase durations as temperatures as temperatures increase.  However, wheat also exhibits vernalisation and photoperiod sensitivities in its Vegetative phase and further photoperiod sensitivity in the EarlyReproducivePhase.  Photoperiod responses are seen as a reduction in the length of a phase for a photoperiod sensitive genotype in response to a longer photoperiod.  Vernalisation responses are more complicated as they are driven by temperature but interact with photoperiod.  For vernalisation sensitive varieties (Winter types) exposure to cool temperatures or short photoperiods during the Vegetative phase will reduce the thermal time duration of the vegetative phase.

          This model draws on the Kirby Framework to capture these vernalisation and photoperiod responses.  This framework assumes that the timing of anthesis is a result of the timing of flag leaf and an additional thermal time passage from there to anthesis.  It also assumes the timing of flag leaf is a rusult of the Final Leaf Number which sets a target, and leaf appearance rate, which sets the rate of progress to this target.  Leaf appearance rate is a function of Thermal time and a genotype specific Phyllochron which changes with Haun stage as described by [Jamieson_LeafAppearance_1995].

          Final Leaf Number (FLN) is modeled as the sum of three numbers:

          FLN = MinLeafNumber + VernalLeaves + PhotoLeaves

          Where MinLeafNumber is the number of leaves that a wheat crop will produce when vernalisation is satisified early in the crops duration (before 2nd true leaf) and it is grown in a long photoperiod..  VernalLeaves are the number of leaves that are added due to vernalisation effects.  For insensitive varieties this will always be zero but this is potentially a larger number for sensitivie varieties and the number progresively decreases as the crop encounters more vernalisation.  PhotoLeaves are the number of leaves that are added to the minimum leaf number as a result of short day exposure.  For insensitive varieties this will be zero but is potential larger for more sensitivie varieties and decreases as day length increases.  More detailed explinations of the components of phenology are provided below.
        SubDailyInterpolation ThermalTime: agregationMethod=0
          XYPairs Response: X=[0, 26, 37]; Y=[0, 26, 0]
          Memo
            Thermal time determines the rate of developmental progress through many of the crops phases and is used by organs to determing potential growth rates.
          ThreeHourAirTemperature InterpolationMethod
        MultiplyFunction DailyVernalisation
          Memo
            Vernalisation responses are based on those described by [Brown_Anthesis_2013].   Vernalisation is assumed to be related to the expression of the Vrn1 Gene.  Its experssion is accumulated daily and daily upregulation as a function of development (DeltaHaunStage) and a TempResponseProfile that declines exponentially from a maximum at 1^o^C to zero at 0^o^C and at 18^o^C.
          VariableReference DeltaHaunStage: VariableName=[Structure].DeltaHaunStage
          SubDailyInterpolation TempResponseProfile: agregationMethod=0
            XYPairs Response
              X=[0, 1, 2, 3, 4, 5, 6, 7, 8, 9, 10, 11, 12, 13, 14, 15, 16, 17, 18, 19, 20, 30, 32]
              Y=[0, 1.205, 1.037, 0.893, 0.768, 0.661, 0.569, 0.49, 0.422, 0.363, 0.312, 0.269, 0.231, 0.199, 0.171, 0.148, 0.127, 0.109, 0.094, 0.081, 0, 0, -0.5]
            ThreeHourAirTemperature InterpolationMethod
        PhotoperiodFunction Photoperiod: Twilight=-6; DayLength=0
        PhaseLookup PercievedPhotoPeriod
          PhaseLookupValue ApexBelowGround: Start=Germination; End=Emergence
            Constant Photoperiod: FixedValue=0; Units=h
          PhaseLookupValue ApexAboveGround: Start=Emergence; End=HarvestRipe
            VariableReference Photoperiod: VariableName=[Phenology].Photoperiod
        MinimumFunction Vrn1
          Memo
            Vrn1 accumulation begins when Vrn4 experssion is down regulated to zero and stops, assuming vernalisation saturation, at a value of 1
          Constant Saturation: FixedValue=1; Units=Relative Experssion
          AccumulateFunction CurrentExpression: StartStageName=Germination; EndStageName=TerminalSpikelet; FractionRemovedOnCut=0; FractionRemovedOnHarvest=0; FractionRemovedOnGraze=0; FractionRemovedOnPrune=0
            LessThanFunction Vernalisation
              VariableReference If_Vrn4: VariableName=[Phenology].Vrn4
              VariableReference IsLessThanLag: VariableName=[Phenology].VernLag
              Constant Return_Zero: FixedValue=0
              VariableReference elseReturn_Vernalisation: VariableName=[Phenology].DailyVernalisation
        MinimumFunction Vrn4
          VariableReference MaxExpression: VariableName=[Phenology].VernLag
          AccumulateFunction CurrentExpression: StartStageName=Germination; EndStageName=TerminalSpikelet; FractionRemovedOnCut=0; FractionRemovedOnHarvest=0; FractionRemovedOnGraze=0; FractionRemovedOnPrune=0
            VariableReference VernalisationConditioning: VariableName=[Phenology].DailyVernalisation
        Constant MinimumLeafNumber: FixedValue=7; Units=Leaves
          Memo
            Number of leaves the plant will produce when fully vernalised early and grown in long photoperiod
        Constant VrnSensitivity: FixedValue=0; Units=Leaves
          Memo
            The difference between Inherent earlyness leaf number and the number of leaves produced when the plant is unvernalised and grown in long photoperiod
        Constant VernLag: FixedValue=1; Units=Unitless
          Memo
            The amount of vernalising temperature required before vernalisation response will be evident.  Value of relative to the amount offl vernalisation temperature required from the end of the lag until vernalisation saturation.  A value of 0 means there is no lag, a value of 1 means the lag is the same (in vernal time) as the vernalisation requirement and a value of 2 means the lag is twice as long as the vernalisation response phase
        Constant PpSensitivity: FixedValue=3; Units=Leaves
          Memo
            The reduction in leaf number going from 8 to 16 h Pp
        Constant EarlyReproductivePpSensitivity: FixedValue=0
          Memo
            The phyllochrons duration for the plant to go from flag leaf ligual appearance at 16 h Pp compared to the phyllochron duration for the same phase at 8 h Pp.
        Constant EarlyReproductiveLongDayBase: FixedValue=2.5
          Memo
            The phyllochrons duration for the plant to go from flag leaf ligual appearance at 16 h Pp.
        GerminatingPhase Germinating: Start=Sowing; End=Germination; IsEmerged=false
          Constant MinSoilTemperature: FixedValue=0
        EmergingPhase Emerging: Start=Germination; End=Emergence; IsEmerged=true; TTForTimeStep=0
          VariableReference ThermalTime: VariableName=[Phenology].ThermalTime
          AddFunction Target
            Constant ShootLag: FixedValue=40
            MultiplyFunction DepthxRate
              VariableReference SowingDepth: VariableName=[Plant].SowingData.Depth
              Constant ShootRate: FixedValue=1.5
        GenericPhase Vegetative: Start=Emergence; End=TerminalSpikelet; IsEmerged=true
          Memo
            The duration of the vegetative phase is set by a target Haun Stage for the occurance of Terminal Spikelet and the rate of leaf appearance.
          VariableReference Progression: VariableName=[Phenology].ThermalTime
          MultiplyFunction Target
            VariableReference Phyllochron: VariableName=[Structure].MeanPhyllochron
            VariableReference HSTS: VariableName=[Structure].HaunStageTerminalSpikelet
          Memo Memo1
            HSTS decreases as vernalisation is accumulated and as photoperiod extends, capturing the effect of these responses on the duration of the Vegetative phase
        LeafAppearancePhase StemElongation: Start=TerminalSpikelet; End=FlagLeaf; IsEmerged=true
          Memo
            The Final leaf number is fixed at Terminal Spikelet and leaves contune to appear at a rate set by thermal time and phyllochron until flag leaf liguale appears and this phase is completed.
          VariableReference ThermalTime: VariableName=[Phenology].ThermalTime
          VariableReference FinalLeafNumber: VariableName=[Structure].FinalLeafNumber
          ExpressionFunction LeafNumber
            Expression=[Leaf].ExpandedCohortNo + [Leaf].NextExpandingLeafProportion
          VariableReference FullyExpandedLeafNo: VariableName=[Leaf].ExpandedCohortNo
          VariableReference InitialisedLeafNumber: VariableName=[Leaf].InitialisedCohortNo
        GenericPhase EarlyReproductive: Start=FlagLeaf; End=Flowering; IsEmerged=true
          VariableReference Progression: VariableName=[Phenology].ThermalTime
          MultiplyFunction Target
            VariableReference Phyllochron: VariableName=[Structure].Phyllochron.BasePhyllochron
            AddFunction Phyllochrons
              VariableReference LongDayBase: VariableName=[Phenology].EarlyReproductiveLongDayBase
              MultiplyFunction IncreaseDueToShortPhotoPeriod
                LinearInterpolationFunction PhotoPeriodResponse
                  XYPairs: X=[11, 16]; Y=[1, 0]
                  VariableReference XValue: VariableName=[Phenology].Photoperiod
                VariableReference PpSensitivity: VariableName=[Phenology].EarlyReproductivePpSensitivity
        GenericPhase GrainDevelopment: Start=Flowering; End=StartGrainFill; IsEmerged=true
          Constant Target: FixedValue=120
          VariableReference Progression: VariableName=[Phenology].ThermalTime
        GenericPhase GrainFilling: Start=StartGrainFill; End=EndGrainFill; IsEmerged=true
          Constant Target: FixedValue=545
          VariableReference Progression: VariableName=[Phenology].ThermalTime
        GenericPhase Maturing: Start=EndGrainFill; End=Maturity; IsEmerged=true
          Constant Target: FixedValue=35
          VariableReference Progression: VariableName=[Phenology].ThermalTime
        GenericPhase Ripening: Start=Maturity; End=HarvestRipe; IsEmerged=true
          Constant Target: FixedValue=300
          VariableReference Progression: VariableName=[Phenology].ThermalTime
        EndPhase ReadyForHarvesting: Start=HarvestRipe; End=Unused; IsEmerged=true
          VariableReference ThermalTime: VariableName=[Phenology].ThermalTime
        ZadokPMF Zadok
        OnEventFunction FlagLeafDAS: SetEvent=FlagLeaf; ReSetEvent=never
          Memo
            A function is used to provide flowering date as days after sowing(DAS).
          Constant PreEventValue: FixedValue=0
          VariableReference PostEventValue: VariableName=[Plant].DaysAfterSowing
        OnEventFunction FloweringDAS: SetEvent=Flowering; ReSetEvent=never
          Memo
            A function is used to provide flowering date as days after sowing(DAS).
          Constant PreEventValue: FixedValue=0
          VariableReference PostEventValue: VariableName=[Plant].DaysAfterSowing
        OnEventFunction MaturityDAS: SetEvent=Maturity; ReSetEvent=never
          Memo
            A function is used to provide maturity date as days after sowing(DAS).
          Constant PreEventValue: FixedValue=0
          VariableReference PostEventValue: VariableName=[Plant].DaysAfterSowing
      Structure: CohortInitialisationStage=Germination; LeafInitialisationStage=Emergence
        VariableReference ThermalTime: VariableName=[Phenology].ThermalTime
        MultiplyFunction Phyllochron
          Memo Rational
            Based on [Jamieson_SIRIUS_1998] where leaf appearace could be described by a base phyllochron determined between leaves 2 and 7 and a phyllochron that was 70% of base phyllochron for leaves < 2 and 130% of base phyllochron for leaves > 7
          LinearInterpolationFunction LeafStageFactor
            XYPairs: X=[0, 2, 3, 7, 8, 11, 12]; Y=[0.75, 0.75, 1, 1, 1.4, 1.4, 1.4]
            VariableReference XValue: VariableName=[Leaf].AppearedCohortNo
          Constant BasePhyllochron: FixedValue=120; Units=oC.d
          LinearInterpolationFunction PhotoPeriodEffect
            XYPairs: X=[8, 12, 14]; Y=[1.6, 1, 1]
            VariableReference XValue: VariableName=[Phenology].Photoperiod
        MultiplyFunction BranchingRate
          Memo
            Potential branching rate is determined by the commonly observed pattern of tillering in wheat, in which each tiller emerges with the third leaf on its parent axis (e.g. first tiller emerges at the same time as the third leaf on the main stem, the first secondary tiller appears with the third leaf on tiller 1).  This is described as a simple function of main stem leaf number.
          PhaseLookup PotentialBranchingRate
            PhaseLookupValue Vegetative: Start=Emergence; End=TerminalSpikelet
              LinearInterpolationFunction PotentialBranchingRate
                XYPairs: X=[1, 2, 3, 4, 5, 6, 7, 8]; Y=[0, 0, 1, 2, 4, 7, 12, 20]
                VariableReference XValue: VariableName=[Structure].LeafTipsAppeared
            PhaseLookupValue Reproductive: Start=TerminalSpikelet; End=HarvestRipe
              Constant Zero: FixedValue=0
          MinimumFunction StressFactors
            LinearInterpolationFunction NitrogenEffect
              Memo
                Inadequate Nitrogen supply is assumed to affect tillering prior to any effect on photosynthesis or leaf size.
              XYPairs: X=[0.5, 2, 3]; Y=[0, 1, 1]
              VariableReference XValue: VariableName=[Arbitrator].FN
            LinearInterpolationFunction CoverEffect
              Memo
                Tillering is said to cease once a threshold fraction of incoming radiation has been achieved.  This captures shading effects on tillering described by [evers2006cessation].
              XYPairs: X=[0, 0.1, 0.25]; Y=[1, 1, 0]
              VariableReference XValue: VariableName=[Leaf].CoverTotal
            LinearInterpolationFunction WaterStressEffect
              XYPairs: X=[0, 1]; Y=[0, 1]
              VariableReference XValue: VariableName=[Root].WaterTensionFactor
        PhaseLookup BranchMortality
          PhaseLookupValue MortalityPhase: Start=FlagLeaf; End=Flowering
            MultiplyFunction Mortality
              LinearInterpolationFunction MortalityPerDegDay
                XYPairs: X=[0, 0.005]; Y=[0.002, 0]
                VariableReference XValue: VariableName=[Structure].MeanTillerGrowthRate
              VariableReference ThermalTime: VariableName=[Phenology].ThermalTime
        HeightFunction HeightModel
          LinearInterpolationFunction PotentialHeight
            XYPairs: X=[3, 4, 5, 6, 7]; Y=[10, 200, 1000, 1100, 1200]
            VariableReference XValue: VariableName=[Phenology].Stage
          LinearInterpolationFunction WaterStress
            XYPairs: X=[0.3, 1]; Y=[0, 1]
            VariableReference XValue: VariableName=[Wheat].Leaf.Fw
        MovingAverageFunction MeanTillerGrowthRate: NumberOfDays=5; StageToStartMovingAverage=Emergence
          DivideFunction TillerGrowthRate
            VariableReference DailyGrowth: VariableName=[Arbitrator].DM.TotalFixationSupply
            VariableReference ThermalTime: VariableName=[Phenology].ThermalTime
            VariableReference StemPopulation: VariableName=[Structure].TotalStemPopn
        MovingAverageFunction MeanPhyllochron: NumberOfDays=300; StageToStartMovingAverage=Emergence
          VariableReference Phyllochron: VariableName=[Structure].Phyllochron
        HoldFunction FinalLeafNumber: WhenToHold=TerminalSpikelet
          AddFunction FinalNodeNumber
            VariableReference MinLeafNumber: VariableName=[Phenology].MinimumLeafNumber
            MultiplyFunction VernalLeaves
              VariableReference UnVernalisedLeaves: VariableName=[Phenology].VrnSensitivity
              SubtractFunction VernalisationReductionFactor
                Constant One: FixedValue=1
                VariableReference RelativeVrn1Expression: VariableName=[Phenology].Vrn1
            MultiplyFunction PhotoPLeaves
              VariableReference ShortPpLeaves: VariableName=[Phenology].PpSensitivity
              LinearInterpolationFunction PhotoPeriodReductionFactor
                XYPairs: X=[10, 16]; Y=[1, 0]
                VariableReference XValue: VariableName=[Phenology].Photoperiod
        ExpressionFunction HaunStageTerminalSpikelet: Expression=([Structure].FinalLeafNumber - 2.85)/1.1
          Memo
            The Haun stage at which Terminal Spikelet occurs is determined from final leaf number using the approach described in [Brown_Anthesis_2013].
        AddFunction HaunStage
          VariableReference AppearedLeaves: VariableName=[Leaf].ExpandedCohortNo
          VariableReference ProportionOfExpandingLeaf: VariableName=[Leaf].NextExpandingLeafProportion
        Constant StemSenescenceAge: FixedValue=0
      ReproductiveOrgan Grain: GrowthRespiration=0; MaintenanceRespiration=0; RipeStage=Ripe
        Biomass Live
        Biomass Dead
        Constant MaxNConcDailyGrowth: FixedValue=0.03
        Constant WaterContent: FixedValue=0.12
        Constant MinimumNConc: FixedValue=0.0123
        Constant MaximumNConc: FixedValue=0.03
        Constant MaximumPotentialGrainSize: FixedValue=0.043; Units=g
        AccumulateFunction AccumThermalTime: StartStageName=Flowering; EndStageName=Maturity; FractionRemovedOnCut=0; FractionRemovedOnHarvest=0; FractionRemovedOnGraze=0; FractionRemovedOnPrune=0
          VariableReference DailyThermalTimeValue: VariableName=[Phenology].ThermalTime
        PhaseLookup DMDemandFunction
          PhaseLookupValue InitialPhase: Start=Flowering; End=StartGrainFill
            FillingRateFunction
              VariableReference NumberFunction: VariableName=[Grain].NumberFunction
              VariableReference FillingDuration: VariableName=[Phenology].GrainDevelopment.Target
              VariableReference ThermalTime: VariableName=[Phenology].ThermalTime
              MultiplyFunction PotentialSizeIncrement
                VariableReference InitialProportion: VariableName=[Grain].InitialGrainProportion
                VariableReference MaximumSize: VariableName=[Grain].MaximumPotentialGrainSize
          PhaseLookupValue LinearPhase: Start=StartGrainFill; End=EndGrainFill
            FillingRateFunction
              VariableReference NumberFunction: VariableName=[Grain].NumberFunction
              VariableReference FillingDuration: VariableName=[Phenology].GrainFilling.Target
              VariableReference ThermalTime: VariableName=[Phenology].ThermalTime
              MultiplyFunction PotentialSizeIncrement
                SubtractFunction ProportionLinearPhase
                  Constant One: FixedValue=1
                  VariableReference InitialProportion: VariableName=[Grain].InitialGrainProportion
                VariableReference MaximumSize: VariableName=[Grain].MaximumPotentialGrainSize
        ExpressionFunction Protein
          Expression=([Grain].Live.N + [Grain].Dead.N)/([Grain].Live.Wt + [Grain].Dead.Wt) * 100 * 5.71
        Constant InitialGrainProportion: FixedValue=0.05
        PhaseLookup NFillingRate
          PhaseLookupValue GrainFilling: Start=Flowering; End=EndGrainFill
            FillingRateFunction
              VariableReference NumberFunction: VariableName=[Grain].NumberFunction
              AddFunction FillingDuration
                VariableReference FloweringToGrainFilling: VariableName=[Phenology].GrainDevelopment.Target
                VariableReference GrainFilling: VariableName=[Phenology].GrainFilling.Target
              VariableReference ThermalTime: VariableName=[Phenology].ThermalTime
              MultiplyFunction PotentialSizeIncrement
                VariableReference MaximumSize: VariableName=[Grain].MaximumPotentialGrainSize
                VariableReference MaximumNConc: VariableName=[Grain].MaximumNConc
        BiomassRemoval BiomassRemovalDefaults: HarvestFractionLiveToRemove=1; HarvestFractionDeadToRemove=0; HarvestFractionLiveToResidue=0; HarvestFractionDeadToResidue=0
        HoldFunction NumberFunction: WhenToHold=Flowering
          MultiplyFunction GrainNumber
            Constant GrainsPerGramOfStem: FixedValue=22; Units=grains
            VariableReference StemMass: VariableName=[StemPlusSpike].Wt
        MultiplyFunction MaintenanceRespirationFunction
          Memo
            Maintenance Respiration Function
          Constant MaintenanceFractionAt20C: FixedValue=0.01
          WangEngelTempFunction: MinTemp=-50; OptTemp=48; MaxTemp=60; RefTemp=20; MaximumTemperatureWeighting=0.5
        Constant DMConversionEfficiency: FixedValue=1
        Constant RemobilisationCost: FixedValue=0
        Constant CarbonConcentration: FixedValue=0.4
        NutrientPoolFunctions DMDemandPriorityFactors
          Constant Structural: FixedValue=1
          Constant Metabolic: FixedValue=1
          Constant Storage: FixedValue=1
        NutrientPoolFunctions NDemandPriorityFactors: same as Replacements.Wheat.Grain.DMDemandPriorityFactors
      Root: GrowthRespiration=0; MaintenanceRespiration=0
        RootShapeCylinder RootShape
        Constant KLModifier: FixedValue=1
        Constant SoilWaterEffect: FixedValue=1
        Constant MaxDailyNUptake: FixedValue=20
        Constant SenescenceRate: FixedValue=0.005
        Constant MaximumRootDepth: FixedValue=1000000
        Constant MaximumNConc: FixedValue=0.01
        Constant MinimumNConc: FixedValue=0.01
        PhaseLookupValue NitrogenDemandSwitch: Start=Germination; End=Maturity
          Constant: FixedValue=1
        BiomassRemoval BiomassRemovalDefaults: HarvestFractionLiveToRemove=0; HarvestFractionDeadToRemove=0; HarvestFractionLiveToResidue=0.2; HarvestFractionDeadToResidue=0
        LinearInterpolationFunction KNO3
          XYPairs: X=[0, 0.004]; Y=[0.02, 0.02]
          VariableReference XValue: VariableName=[Root].LengthDensity
        LinearInterpolationFunction KNH4
          XYPairs: X=[0, 0.004]; Y=[0.01, 0.01]
          VariableReference XValue: VariableName=[Root].LengthDensity
        Constant SpecificRootLength: FixedValue=105; Units=m/g
        MultiplyFunction RootFrontVelocity
          PhaseLookup PotentialRootFrontVelocity
            PhaseLookupValue PreEmergence: Start=Germination; End=Emergence
              Constant Value: FixedValue=5
            PhaseLookupValue PostEmergence: Start=Emergence; End=Maturity
              Constant Value: FixedValue=20
          WeightedTemperatureFunction TemperatureFactor: MaximumTemperatureWeighting=0.5
            XYPairs: X=[0, 15, 25, 35]; Y=[0, 1, 1, 0]
          LinearInterpolationFunction WaterFactor
            SoilWaterScale: LLModel=1
            XYPairs: X=[0, 0.25, 1]; Y=[0, 1, 1]
            VariableReference XValue: VariableName=[SoilWaterScale]
        LinearInterpolationFunction NUptakeSWFactor
          SoilWaterScale: LLModel=1
          XYPairs: X=[0, 1]; Y=[0, 1]
          Memo
            This is modelled in the same way as the old wheat model
          VariableReference XValue: VariableName=[SoilWaterScale]
        WangEngelTempFunction MaintenanceRespirationFunction0: MinTemp=-50; OptTemp=48; MaxTemp=60; RefTemp=0; MaximumTemperatureWeighting=0.5
        MultiplyFunction MaintenanceRespirationFunction
          Memo
            Maintenance Respiration Function
          Constant MaintenanceFractionAt20C: FixedValue=0.015
          WangEngelTempFunction: MinTemp=-50; OptTemp=48; MaxTemp=60; RefTemp=20; MaximumTemperatureWeighting=0.5
        Constant DMConversionEfficiency: FixedValue=1
        Constant RemobilisationCost: FixedValue=0
        Constant CarbonConcentration: FixedValue=0.4
        NutrientDemandFunctions DMDemands
          MultiplyFunction Structural
            PartitionFractionDemandFunction DMDemandFunction
              PhaseLookup PartitionFraction
                PhaseLookupValue PreEmergence: Start=Germination; End=Emergence
                  Constant Value: FixedValue=0
                PhaseLookupValue PreFlowering: Start=Emergence; End=Flowering
                  LinearInterpolationFunction AgeFactor
                    XYPairs: X=[3, 4]; Y=[0.5, 0.2]
                    VariableReference XValue: VariableName=[Phenology].Stage
                PhaseLookupValue PostFlowering: Start=Flowering; End=EndGrainFill
                  Constant Value: FixedValue=0.2
            Constant StructuralFraction: FixedValue=1
          Constant Metabolic: FixedValue=0
          StorageDMDemandFunction Storage
            SubtractFunction StorageFraction
              Constant One: FixedValue=1
              VariableReference StructuralFraction: VariableName=[Root].DMDemands.Structural.StructuralFraction
          Constant QStructuralPriority: FixedValue=1
          Constant QMetabolicPriority: FixedValue=1
          Constant QStoragePriority: FixedValue=1
        NutrientDemandFunctions NDemands
          MultiplyFunction Structural
            VariableReference MinNconc: VariableName=[Root].minimumNconc
            VariableReference PotentialDMAllocation: VariableName=[Root].potentialDMAllocation.Structural
          MultiplyFunction Metabolic
            SubtractFunction MetabolicNconc
              VariableReference CritNconc: VariableName=[Root].criticalNConc
              VariableReference MinNconc: VariableName=[Root].minimumNconc
            VariableReference PotentialDMAllocation: VariableName=[Root].potentialDMAllocation.Structural
          StorageNDemandFunction Storage
            VariableReference NitrogenDemandSwitch: VariableName=[Root].nitrogenDemandSwitch
            VariableReference MaxNconc: VariableName=[Root].maximumNconc
          Constant QStructuralPriority: FixedValue=1
          Constant QMetabolicPriority: FixedValue=1
          Constant QStoragePriority: FixedValue=1
        VariableReference CriticalNConc: VariableName=[Root].MinimumNConc
        NutrientPoolFunctions InitialWt
          Constant Structural: FixedValue=0.005; Units=g/plant
          Constant Metabolic: FixedValue=0
          Constant Storage: FixedValue=0
        Constant RootDepthStressFactor: FixedValue=1
      Leaf: MaxCover=1; Albedo=0.25; Gsmax350=0.011; R50=150; KDead=0.3; MaximumMainStemLeafNumber=30
        zero: CurrentExpandingLeaf, StartFractionExpanded, FractionNextleafExpanded, DeadNodesYesterday, GrowthRespiration, LAI, Depth, Width, PotentialEP, WaterDemand, TipsAtEmergence, CohortsAtInitialisation, FractionDied
        LeafCohort InitialLeaves[1]: Rank=1; Area=200
          zero: NReallocationFactor, DMReallocationFactor, NRetranslocationFactor, DMRetranslocationFactor, ShadeInducedSenRate, SenescedFrac, DeltaPotentialArea, DeltaStressConstrainedArea, DeltaCarbonConstrainedArea, PotentialStructuralDMAllocation, PotentialMetabolicDMAllocation, MetabolicNReallocated, MetabolicWtReallocated, StorageNReallocated, StorageWtReallocated, MetabolicNRetranslocated, StorageNRetrasnlocated, DMRetranslocated, MetabolicNAllocation, StructuralDMAllocation, MetabolicDMAllocation
          ApexStandard Apex
            Constant StemSenescenceAge: FixedValue=0
        LeafCohort InitialLeaves[2]: Rank=2
          zero: NReallocationFactor, DMReallocationFactor, NRetranslocationFactor, DMRetranslocationFactor, ShadeInducedSenRate, SenescedFrac, DeltaPotentialArea, DeltaStressConstrainedArea, DeltaCarbonConstrainedArea, PotentialStructuralDMAllocation, PotentialMetabolicDMAllocation, MetabolicNReallocated, MetabolicWtReallocated, StorageNReallocated, StorageWtReallocated, MetabolicNRetranslocated, StorageNRetrasnlocated, DMRetranslocated, MetabolicNAllocation, StructuralDMAllocation, MetabolicDMAllocation, Area
          ApexStandard Apex
            Constant StemSenescenceAge: FixedValue=0
        LeafCohortParameters CohortParameters: ExpansionStressValue=0; CellDivisionStressValue=0; LagAccelerationValue=0; SenescenceAccelerationValue=0; ShadeInducedSenescenceRateValue=0; SenessingLeafRelativeSizeValue=0
          Constant NReallocationFactor: FixedValue=1
          Constant NRetranslocationFactor: FixedValue=0.03
          Constant DMReallocationFactor: FixedValue=0
          Constant DMRetranslocationFactor: FixedValue=0
          MinimumFunction CellDivisionStress
            LinearInterpolationFunction WaterStressFactor
              XYPairs: X=[0.5, 1]; Y=[0.1, 1]
              VariableReference XValue: VariableName=[Wheat].Leaf.Fw
            LinearInterpolationFunction NitrogenStressFactor
              XYPairs: X=[0, 0.5, 1]; Y=[0.1, 0.1, 1]
              VariableReference XValue: VariableName=[Wheat].Leaf.Fn
          MinimumFunction ExpansionStress
            LinearInterpolationFunction WaterStress
              XYPairs: X=[0.1, 1, 1.3]; Y=[0, 1, 1]
              VariableReference XValue: VariableName=[Root].WaterTensionFactor
            LinearInterpolationFunction TemperatureEffect
              XYPairs: X=[0, 12, 14]; Y=[0, 1, 1]
              VariableReference XValue: VariableName=[IWeather].MeanT
            LinearInterpolationFunction NitrogenStressFactor
              XYPairs: X=[0, 0.5, 1]; Y=[0.1, 0.1, 1]
              VariableReference XValue: VariableName=[Wheat].Leaf.Fn
          MultiplyFunction MaxArea
            Constant AreaLargestLeaves: FixedValue=2600; Units=mm^2
            LinearInterpolationFunction AgeFactor
              XYPairs: X=[3, 3.45, 4]; Y=[0.1, 0.5, 1]
              VariableReference XValue: VariableName=[Phenology].Stage
          MultiplyFunction GrowthDuration
            Constant Multiplier: FixedValue=1.3
            VariableReference Phyllochron: VariableName=[Structure].Phyllochron
          MultiplyFunction LagDuration
            LinearInterpolationFunction AgeFactor
              XYPairs: X=[3, 4]; Y=[0.4, 1]
              VariableReference XValue: VariableName=[Phenology].Stage
            SubtractFunction LastLeafDuration
              AddFunction ThermalTimeToRipe
                VariableReference EarlyReproductive: VariableName=[Phenology].EarlyReproductive.Target
                VariableReference GrainDevelopment: VariableName=[Phenology].GrainDevelopment.Target
                VariableReference GrainFilling: VariableName=[Phenology].GrainFilling.Target
                VariableReference Maturing: VariableName=[Phenology].Maturing.Target
                VariableReference Ripening: VariableName=[Phenology].Ripening.Target
              VariableReference SenescenceDuration: VariableName=[Leaf].CohortParameters.SenescenceDuration
          MultiplyFunction SenescenceDuration
            Constant Multiplier: FixedValue=3
            VariableReference Phyllochron: VariableName=[Structure].Phyllochron
          Constant DetachmentLagDuration: FixedValue=1000000
          Constant DetachmentDuration: FixedValue=1000000
          Constant RelativeBranchLeafSize: FixedValue=1
          LinearInterpolationFunction MaximumNConc
            XYPairs: X=[3, 4, 6]; Y=[0.08, 0.05, 0.02]
            VariableReference XValue: VariableName=[Phenology].Stage
          MultiplyFunction CriticalNConc
            LinearInterpolationFunction CriticalNConcAt350ppm
              XYPairs: X=[3, 4, 6]; Y=[0.07, 0.04, 0.015]
              VariableReference XValue: VariableName=[Phenology].Stage
            LinearInterpolationFunction CO2Factor
              XYPairs: X=[350, 700]; Y=[1, 0.93]
              VariableReference XValue: VariableName=[Weather].CO2
          LinearInterpolationFunction MinimumNConc
            XYPairs: X=[3, 4, 6]; Y=[0.01, 0.005, 0.005]
            VariableReference XValue: VariableName=[Phenology].Stage
          AddFunction LagAcceleration
            Constant One: FixedValue=1
            MultiplyFunction Stress
              Constant StressResponseCoefficient: FixedValue=1
              LinearInterpolationFunction StressFactor
                XYPairs: X=[0, 0.5]; Y=[0.5, 0]
                VariableReference XValue: VariableName=[Wheat].Leaf.Fw
          AddFunction SenescenceAcceleration: same as Replacements.Wheat.Leaf.CohortParameters.LagAcceleration
          LinearInterpolationFunction SpecificLeafAreaMax
            XYPairs: X=[3, 4]; Y=[18000, 30000]
            VariableReference XValue: VariableName=[Phenology].Stage
          LinearInterpolationFunction SpecificLeafAreaMin
            XYPairs: X=[0.4, 1]; Y=[10000, 18000]
            VariableReference XValue: VariableName=[Leaf].Fn
          Constant InitialNConc: FixedValue=0
          Constant StructuralFraction: FixedValue=0.5
          Constant StorageFraction: FixedValue=0
          Constant LeafSizeShapeParameter: FixedValue=0.3
          Constant SenessingLeafRelativeSize: FixedValue=1; Units=0-1
          MultiplyFunction ShadeInducedSenescenceRate
            Constant RatePerDegDay: FixedValue=0
              Memo
                1% per degree day means it takes one phyllochron for a shaded leaf to fully sceness
            VariableReference ThermalTime: VariableName=[Phenology].ThermalTime
          ArrayFunction LagDurationAgeMultiplier: Values=1 1 1
          ArrayFunction SenescenceDurationAgeMultiplier: Values=1 1 1
          ArrayFunction LeafSizeAgeMultiplier: Values=1 1 1 1 1 1 1 1 1 1 1 1
          Constant RemobilisationCost: FixedValue=0
          Constant CarbonConcentration: FixedValue=0.4
          MultiplyFunction MaintenanceRespirationFunction
            Memo
              Maintenance Respiration Function
            Constant MaintenanceFractionAt20C: FixedValue=0.03
            WangEngelTempFunction: MinTemp=-50; OptTemp=48; MaxTemp=60; RefTemp=20; MaximumTemperatureWeighting=0.5
            DivideFunction LiveLeafWtFraction
              VariableReference LiveLeafWt: VariableName=[Leaf].Live.Wt
              VariableReference LeafWt: VariableName=[Leaf].Wt
        CanopyPhotosynthesis Photosynthesis: GrossPhotosynthesis=0
          CanopyGrossPhotosynthesisHourly: KDIF=0.7
          LeafLightUseEfficiency: LUEref=0.48; pathway=C3
          LeafMaxGrossPhotosynthesis: Pgmmax=40; pathway=C3
            WangEngelTempFunction TemperatureResponse: MinTemp=0; OptTemp=27.5; MaxTemp=35; RefTemp=27.5; MaximumTemperatureWeighting=0.71
          Constant FN: FixedValue=1
          Constant FVPD: FixedValue=1
        Constant FrostFraction: FixedValue=0
        VariableReference ThermalTime: VariableName=[Phenology].ThermalTime
        MinimumFunction FRGRFunction
          VariableReference RUE_FT
            VariableName=[Leaf].Photosynthesis.LeafMaxGrossPhotosynthesis.TemperatureResponse
          MinimumFunction Others
            VariableReference RUE_FN: VariableName=[Leaf].Photosynthesis.FN
            VariableReference RUE_FVPD: VariableName=[Leaf].Photosynthesis.FVPD
        BiomassRemoval BiomassRemovalDefaults: HarvestFractionLiveToRemove=0; HarvestFractionDeadToRemove=0; HarvestFractionLiveToResidue=0.3; HarvestFractionDeadToResidue=0.3
        Constant ExtinctionCoeff: FixedValue=0.5
        Constant StructuralFraction: FixedValue=0.5
        Constant DMConversionEfficiency: FixedValue=1
        MultiplyFunction MaintenanceRespirationFunction
          Memo
            Maintenance Respiration Function
          Constant MaintenanceFractionAt20C: FixedValue=0.03
          WangEngelTempFunction: MinTemp=-50; OptTemp=48; MaxTemp=60; RefTemp=20; MaximumTemperatureWeighting=0.5
        Constant RemobilisationCost: FixedValue=0
        Constant CarbonConcentration: FixedValue=0.4
        Constant StomatalConductanceCO2Modifier: FixedValue=1
        Constant WidthFunction: FixedValue=0
        VariableReference DepthFunction: VariableName=[Leaf].Height
        NutrientPoolFunctions DMDemandPriorityFactors: same as Replacements.Wheat.Grain.DMDemandPriorityFactors
        NutrientPoolFunctions NDemandPriorityFactors: same as Replacements.Wheat.Grain.DMDemandPriorityFactors
        VariableReference Tips: VariableName=[Structure].LeafTipsAppeared
        VariableReference Ligules: VariableName=[Leaf].ExpandedCohortNo
        VariableReference FinalLeafNumber: VariableName=[Structure].FinalLeafNumber
        VariableReference StemPopulation: VariableName=[Structure].TotalStemPopn
        VariableReference StemNumberPerPlant: VariableName=[Structure].BranchNumber
        VariableReference MainStemPopulation: VariableName=[Plant].SowingData.Population
      GenericOrgan Spike: IsAboveGround=true
        Constant NReallocationFactor: FixedValue=0
        Constant NRetranslocationFactor: FixedValue=0.1
        Constant MaximumNConc: FixedValue=0.01
        Constant SenescenceRate: FixedValue=0; Units=/d
        Constant MinimumNConc: FixedValue=0.003
        BiomassRemoval BiomassRemovalDefaults: HarvestFractionLiveToRemove=0.5; HarvestFractionDeadToRemove=0; HarvestFractionLiveToResidue=0.1; HarvestFractionDeadToResidue=0
        PhaseLookupValue NitrogenDemandSwitch: Start=Emergence; End=StartGrainFill
          Constant: FixedValue=1
        PhaseLookup DMRetranslocationFactor
          PhaseLookupValue VegetativeGrowth: Start=Emergence; End=StartGrainFill
            Constant DMRetranslocationFactor: FixedValue=0
          PhaseLookupValue ReproductiveGrowth: Start=StartGrainFill; End=EndGrainFill
            Constant DMRetranslocationFactor: FixedValue=0.5
        Constant DetachmentRateFunction: FixedValue=0; Units=/d
        Constant DMConversionEfficiency: FixedValue=1; Units=0-1
        VariableReference HeadNumber: VariableName=[Structure].TotalStemPopn
        WangEngelTempFunction RespirationFunction: MinTemp=-50; OptTemp=48; MaxTemp=60; RefTemp=0; MaximumTemperatureWeighting=0.5
        MultiplyFunction MaintenanceRespirationFunction: same as Replacements.Wheat.Root.MaintenanceRespirationFunction
        Constant DMReallocationFactor: FixedValue=0
        VariableReference CriticalNConc: VariableName=[Spike].MinimumNConc
        Constant RemobilisationCost: FixedValue=0
        Constant CarbonConcentration: FixedValue=0.4
        NutrientDemandFunctions DMDemands
          MultiplyFunction Structural
            PopulationBasedDemandFunction DMDemandFunction
              VariableReference ThermalTime: VariableName=[Phenology].ThermalTime
              Constant ExpansionStress: FixedValue=1
              VariableReference OrganPopulation: VariableName=[Spike].HeadNumber
              Constant StartStage: FixedValue=5
              Constant MaximumOrganWt: FixedValue=0.5
              AddFunction GrowthDuration
                VariableReference EarlyReproductive: VariableName=[Phenology].EarlyReproductive.Target
                VariableReference GrainDevelopment: VariableName=[Phenology].GrainDevelopment.Target
            Constant StructuralFraction: FixedValue=0.9
          Constant Metabolic: FixedValue=0
          StorageDMDemandFunction Storage
            SubtractFunction StorageFraction
              Constant One: FixedValue=1
              VariableReference StructuralFraction: VariableName=[Spike].DMDemands.Structural.StructuralFraction
          Constant QStructuralPriority: FixedValue=1
          Constant QMetabolicPriority: FixedValue=1
          Constant QStoragePriority: FixedValue=1
        NutrientDemandFunctions NDemands
          MultiplyFunction Structural
            VariableReference MinNconc: VariableName=[Spike].minimumNconc
            VariableReference PotentialDMAllocation: VariableName=[Spike].potentialDMAllocation.Structural
          MultiplyFunction Metabolic
            SubtractFunction MetabolicNconc
              VariableReference CritNconc: VariableName=[Spike].criticalNConc
              VariableReference MinNconc: VariableName=[Spike].minimumNconc
            VariableReference PotentialDMAllocation: VariableName=[Spike].potentialDMAllocation.Structural
          StorageNDemandFunction Storage
            VariableReference NitrogenDemandSwitch: VariableName=[Spike].nitrogenDemandSwitch
            VariableReference MaxNconc: VariableName=[Spike].maximumNconc
          Constant QStructuralPriority: FixedValue=1
          Constant QMetabolicPriority: FixedValue=1
          Constant QStoragePriority: FixedValue=1
        RetranslocateNonStructural RetranslocateNitrogen
        NutrientPoolFunctions InitialWt
          Constant Structural: FixedValue=0; Units=g/m^2
          Constant Metabolic: FixedValue=0
          Constant Storage: FixedValue=0
        Constant Photosynthesis: FixedValue=0
        VariableReference initialNConcFunction: VariableName=[Spike].MinimumNConc
      GenericOrgan Stem: IsAboveGround=true
        Constant SenescenceRate: FixedValue=0; Units=/d
        LinearInterpolationFunction MaximumNConc
          XYPairs: X=[3, 4, 5, 6]; Y=[0.07, 0.04, 0.015, 0.012]
          VariableReference XValue: VariableName=[Phenology].Stage
        Constant MinimumNConc: FixedValue=0.0025
        PhaseLookupValue NitrogenDemandSwitch: Start=Emergence; End=StartGrainFill
          Constant: FixedValue=1
        Constant NReallocationFactor: FixedValue=0
        PhaseLookup NRetranslocationFactor
          PhaseLookupValue VegetativeGrowth: Start=Sowing; End=Flowering
            Constant Fraction: FixedValue=0
          PhaseLookupValue ReproductiveGrowth: Start=Flowering; End=HarvestRipe
            Constant Fraction: FixedValue=0.5
        PhaseLookup DMRetranslocationFactor: same as Replacements.Wheat.Spike.DMRetranslocationFactor
        BiomassRemoval BiomassRemovalDefaults: HarvestFractionLiveToRemove=0.5; HarvestFractionDeadToRemove=0; HarvestFractionLiveToResidue=0.1; HarvestFractionDeadToResidue=0
        DivideFunction PercentWSC
          VariableReference WSC: VariableName=[Stem].Live.StorageWt
          VariableReference StemWt: VariableName=[Stem].Live.Wt
        Constant DetachmentRateFunction: FixedValue=0; Units=/d
        Constant DMConversionEfficiency: FixedValue=1; Units=0-1
        WangEngelTempFunction MaintenanceRespirationFunction0: MinTemp=-50; OptTemp=48; MaxTemp=60; RefTemp=60; MaximumTemperatureWeighting=0.5
        MultiplyFunction MaintenanceRespirationFunction
          Memo
            Maintenance Respiration Function
          Constant MaintenanceFractionAt20C: FixedValue=0.02
          WangEngelTempFunction: MinTemp=-50; OptTemp=48; MaxTemp=60; RefTemp=20; MaximumTemperatureWeighting=0.5
        Constant DMReallocationFactor: FixedValue=0
        VariableReference CriticalNConc: VariableName=[Stem].MinimumNConc
        Constant RemobilisationCost: FixedValue=0
        Constant CarbonConcentration: FixedValue=0.4
        NutrientDemandFunctions DMDemands
          MultiplyFunction Structural
            PartitionFractionDemandFunction DMDemandFunction
              PhaseLookup PartitionFraction
                PhaseLookupValue PreStemElongation: Start=Emergence; End=TerminalSpikelet
                  Constant StemFraction: FixedValue=0.4
                PhaseLookupValue StemElongation: Start=TerminalSpikelet; End=FlagLeaf
                  Constant StemFraction: FixedValue=0.6
                PhaseLookupValue EarEmergence: Start=FlagLeaf; End=Flowering
                  Constant StemFraction: FixedValue=0.6
            PhaseLookup StructuralFraction
              PhaseLookupValue VegetativeGrowth: Start=Sowing; End=FlagLeaf
                Constant Fraction: FixedValue=0.7
              PhaseLookupValue ReproductiveGrowth: Start=FlagLeaf; End=HarvestRipe
                Constant Fraction: FixedValue=0.05
          Constant Metabolic: FixedValue=0
          StorageDMDemandFunction Storage
            SubtractFunction StorageFraction
              Constant One: FixedValue=1
              VariableReference StructuralFraction: VariableName=[Stem].DMDemands.Structural.StructuralFraction
          Constant QStructuralPriority: FixedValue=1
          Constant QMetabolicPriority: FixedValue=1
          Constant QStoragePriority: FixedValue=1
        NutrientDemandFunctions NDemands
          MultiplyFunction Structural
            VariableReference MinNconc: VariableName=[Stem].minimumNconc
            VariableReference PotentialDMAllocation: VariableName=[Stem].potentialDMAllocation.Structural
          MultiplyFunction Metabolic
            SubtractFunction MetabolicNconc
              VariableReference CritNconc: VariableName=[Stem].criticalNConc
              VariableReference MinNconc: VariableName=[Stem].minimumNconc
            VariableReference PotentialDMAllocation: VariableName=[Stem].potentialDMAllocation.Structural
          StorageNDemandFunction Storage
            VariableReference NitrogenDemandSwitch: VariableName=[Stem].nitrogenDemandSwitch
            VariableReference MaxNconc: VariableName=[Stem].maximumNconc
          Constant QStructuralPriority: FixedValue=1
          Constant QMetabolicPriority: FixedValue=1
          Constant QStoragePriority: FixedValue=1
        RetranslocateNonStructural RetranslocateNitrogen
        NutrientPoolFunctions InitialWt: same as Replacements.Wheat.Spike.InitialWt
        Constant Photosynthesis: FixedValue=0
        VariableReference initialNConcFunction: VariableName=[Stem].MinimumNConc
      CompositeBiomass AboveGround: OrganNames=[Leaf, Stem, Spike, Grain]; IncludeLive=true; IncludeDead=true
      CompositeBiomass AboveGroundLive: OrganNames=[Leaf, Stem, Spike, Grain]; IncludeLive=true; IncludeDead=false
      CompositeBiomass AboveGroundDead: OrganNames=[Leaf, Stem, Spike, Grain]; IncludeLive=false; IncludeDead=true
      CompositeBiomass BelowGround: OrganNames=[Root]; IncludeLive=true; IncludeDead=true
      CompositeBiomass Total: OrganNames=[Leaf, Stem, Root, Spike, Grain]; IncludeLive=true; IncludeDead=true
      CompositeBiomass TotalLive: OrganNames=[Leaf, Stem, Root, Spike, Grain]; IncludeLive=true; IncludeDead=false
      CompositeBiomass TotalDead: OrganNames=[Leaf, Stem, Root, Spike, Grain]; IncludeLive=false; IncludeDead=true
      CompositeBiomass Ear: OrganNames=[Spike, Grain]; IncludeLive=true; IncludeDead=true
        Memo
          The Ear composite biomass object includes the Live and dead pools of all organs within the Ear to allow output for total dry matter and Nutrient contents, including total structural, non-structural and metabolic pools.
      CompositeBiomass StemPlusSpike: OrganNames=[Stem, Spike]; IncludeLive=true; IncludeDead=true
      Folder Cultivars
        Folder New Zealand
          Cultivar Alberic
            Command:
              [Phenology].MinimumLeafNumber.FixedValue = 9
              [Phenology].VrnSensitivity.FixedValue = 7
              [Phenology].PpSensitivity.FixedValue = 3
          Cultivar Amarok
            Command:
              [Phenology].MinimumLeafNumber.FixedValue = 9
              [Phenology].VrnSensitivity.FixedValue = 10
              [Phenology].PpSensitivity.FixedValue = 6
              [Phenology].EarlyReproductivePpSensitivity.FixedValue = 5
              [Structure].Phyllochron.BasePhyllochron.FixedValue = 80
          Cultivar Aspiring
            Command:
              [Phenology].MinimumLeafNumber.FixedValue = 9
              [Phenology].VrnSensitivity.FixedValue = 7
              [Phenology].PpSensitivity.FixedValue = 3
          Cultivar BattenWinter
            Command:
              [Phenology].MinimumLeafNumber.FixedValue = 8
              [Phenology].VrnSensitivity.FixedValue = 8
              [Phenology].PpSensitivity.FixedValue = 5
              [Phenology].EarlyReproductivePpSensitivity.FixedValue = 3
              [Structure].Phyllochron.BasePhyllochron.FixedValue = 100
              [Leaf].ExtinctionCoeff.FixedValue = 0.7
          Cultivar BattenSpring
            Command:
              [Phenology].MinimumLeafNumber.FixedValue = 7
              [Phenology].VrnSensitivity.FixedValue = 0
              [Phenology].PpSensitivity.FixedValue = 5
              [Phenology].EarlyReproductivePpSensitivity.FixedValue = 3
              [Structure].Phyllochron.BasePhyllochron.FixedValue = 100
              [Leaf].ExtinctionCoeff.FixedValue = 0.7
          Cultivar Centaur
            Command:
              [Phenology].MinimumLeafNumber.FixedValue = 9
              [Phenology].VrnSensitivity.FixedValue = 7
              [Phenology].PpSensitivity.FixedValue = 3
          Cultivar Claire
            Command:
              [Phenology].MinimumLeafNumber.FixedValue = 8
              [Phenology].VrnSensitivity.FixedValue = 8
              [Phenology].PpSensitivity.FixedValue = 8
              [Phenology].EarlyReproductivePpSensitivity.FixedValue = 3
              [Structure].Phyllochron.BasePhyllochron.FixedValue = 100
          Cultivar Conquest
            Command:
              [Phenology].MinimumLeafNumber.FixedValue = 7
              [Phenology].VrnSensitivity.FixedValue = 0
              [Phenology].PpSensitivity.FixedValue = 3
              [Structure].Phyllochron.BasePhyllochron.FixedValue = 100
          Cultivar Discovery
            Command:
              [Phenology].MinimumLeafNumber.FixedValue = 8.5
              [Phenology].VrnSensitivity.FixedValue = 0
              [Phenology].PpSensitivity.FixedValue = 0
              [Structure].Phyllochron.BasePhyllochron.FixedValue = 80
              [Leaf].CohortParameters.MaxArea.AreaLargestLeaves.FixedValue = 1600
              [Grain].MaximumPotentialGrainSize.FixedValue = 0.051
              [Grain].NumberFunction.GrainNumber.GrainsPerGramOfStem.FixedValue = 25
              [Leaf].ExtinctionCoeff.FixedValue = 0.5
              [Structure].BranchingRate.PotentialBranchingRate.Vegetative.PotentialBranchingRate.XYPairs.Y = 0,0,0,0,4,7,12,20
            Memo
              This is a spring wheat with a high grain number and later tillering
          Cultivar Einstein
            Command:
              [Phenology].MinimumLeafNumber.FixedValue = 9
              [Phenology].VrnSensitivity.FixedValue = 7
              [Phenology].PpSensitivity.FixedValue = 3
          Cultivar Exceed
            Command:
              [Phenology].MinimumLeafNumber.FixedValue = 9
              [Phenology].VrnSensitivity.FixedValue = 7
              [Phenology].PpSensitivity.FixedValue = 3
          Cultivar Majestic
            Command:
              [Phenology].MinimumLeafNumber.FixedValue = 9
              [Phenology].VrnSensitivity.FixedValue = 7
              [Phenology].PpSensitivity.FixedValue = 3
          Cultivar Option
            Command:
              [Phenology].MinimumLeafNumber.FixedValue = 9
              [Phenology].VrnSensitivity.FixedValue = 7
              [Phenology].PpSensitivity.FixedValue = 3
          Cultivar Otane
            Command:
              [Phenology].MinimumLeafNumber.FixedValue = 6
              [Phenology].VrnSensitivity.FixedValue = 0
              [Phenology].PpSensitivity.FixedValue = 4
              [Phenology].EarlyReproductivePpSensitivity.FixedValue = 2
              [Structure].Phyllochron.BasePhyllochron.FixedValue = 100
          Cultivar Pennant
            Command:
              [Phenology].MinimumLeafNumber.FixedValue = 9
              [Phenology].VrnSensitivity.FixedValue = 7
              [Phenology].PpSensitivity.FixedValue = 3
          Cultivar Regency
            Command:
              [Phenology].MinimumLeafNumber.FixedValue = 9
              [Phenology].VrnSensitivity.FixedValue = 7
              [Phenology].PpSensitivity.FixedValue = 3
          Cultivar Richmond
            Command:
              [Phenology].MinimumLeafNumber.FixedValue = 9
              [Phenology].VrnSensitivity.FixedValue = 7
              [Phenology].PpSensitivity.FixedValue = 3
          Cultivar Robigus
            Command:
              [Phenology].MinimumLeafNumber.FixedValue = 9
              [Phenology].VrnSensitivity.FixedValue = 7
              [Phenology].PpSensitivity.FixedValue = 3
          Cultivar Rongotea
            Command:
              [Phenology].MinimumLeafNumber.FixedValue = 7
              [Phenology].VrnSensitivity.FixedValue = 0
              [Phenology].PpSensitivity.FixedValue = 2
              [Phenology].EarlyReproductivePpSensitivity.FixedValue = 3
              [Structure].Phyllochron.BasePhyllochron.FixedValue = 100
          Cultivar Rubric
            Command:
              [Phenology].MinimumLeafNumber.FixedValue = 9
              [Phenology].VrnSensitivity.FixedValue = 7
              [Phenology].PpSensitivity.FixedValue = 3
          Cultivar Sage
            Command:
              [Phenology].MinimumLeafNumber.FixedValue = 9
              [Phenology].VrnSensitivity.FixedValue = 7
              [Phenology].PpSensitivity.FixedValue = 3
          Cultivar Saracen
            Command:
              [Phenology].MinimumLeafNumber.FixedValue = 9
              [Phenology].VrnSensitivity.FixedValue = 7
              [Phenology].PpSensitivity.FixedValue = 3
          Cultivar Savannah
            Command:
              [Phenology].MinimumLeafNumber.FixedValue = 9
              [Phenology].VrnSensitivity.FixedValue = 7
              [Phenology].PpSensitivity.FixedValue = 3
          Cultivar Solstice
            Command:
              [Phenology].MinimumLeafNumber.FixedValue = 9
              [Phenology].VrnSensitivity.FixedValue = 7
              [Phenology].PpSensitivity.FixedValue = 3
          Cultivar Tanker
            Command:
              [Phenology].MinimumLeafNumber.FixedValue = 9
              [Phenology].VrnSensitivity.FixedValue = 7
              [Phenology].PpSensitivity.FixedValue = 3
          Cultivar Tribute
            Command:
              [Phenology].MinimumLeafNumber.FixedValue = 9
              [Phenology].VrnSensitivity.FixedValue = 7
              [Phenology].PpSensitivity.FixedValue = 3
          Cultivar Wakanui
            Command:
              [Phenology].MinimumLeafNumber.FixedValue = 8
              [Phenology].VrnSensitivity.FixedValue = 10
              [Phenology].PpSensitivity.FixedValue = 0
              [Phenology].EarlyReproductiveLongDayBase.FixedValue = 4
              [Structure].Phyllochron.BasePhyllochron.FixedValue = 100
              [Phenology].DailyVernalisation.TempResponseProfile.XYPairs.X = 0,1,8
              [Phenology].DailyVernalisation.TempResponseProfile.XYPairs.Y = 0,1.204,0
              [Leaf].ExtinctionCoeff.FixedValue = 0.7
              [Grain].NumberFunction.GrainNumber.GrainsPerGramOfStem.FixedValue = 17
              [Leaf].CohortParameters.MaxArea.AreaLargestLeaves.FixedValue = 3000
          Cultivar Weston
            Command:
              [Phenology].MinimumLeafNumber.FixedValue = 9
              [Phenology].VrnSensitivity.FixedValue = 7
              [Phenology].PpSensitivity.FixedValue = 3
        Folder Australia
          Cultivar Axe
            Command:
              [Phenology].MinimumLeafNumber.FixedValue = 5
              [Phenology].VrnSensitivity.FixedValue = 0
              [Phenology].PpSensitivity.FixedValue = 4
              [Phenology].EarlyReproductivePpSensitivity.FixedValue = 0
              [Structure].Phyllochron.BasePhyllochron.FixedValue = 100
          Cultivar Bolac
            Command:
              [Phenology].MinimumLeafNumber.FixedValue = 6
              [Phenology].VrnSensitivity.FixedValue = 0
              [Phenology].PpSensitivity.FixedValue = 4
              [Structure].Phyllochron.BasePhyllochron.FixedValue = 100
          Cultivar Cunningham
            Command:
              [Phenology].MinimumLeafNumber.FixedValue = 6
              [Phenology].VrnSensitivity.FixedValue = 0
              [Phenology].PpSensitivity.FixedValue = 4
              [Structure].Phyllochron.BasePhyllochron.FixedValue = 100
            Alias Anlace
            Alias Arrivato
            Alias Babbler
            Alias Barham
            Alias Baxter
            Alias Bowie
            Alias Buckley
            Alias Buckly
            Alias Burunga
            Alias Camm
            Alias Carinya
            Alias ChiefCLPlus
            Alias CLF_Janz
            Alias Dagger
            Alias DBAAurora
            Alias ElmoreCLPlus
            Alias Espada
            Alias Frame
            Alias Gazelle
            Alias Halberd
            Alias Hybrid_Meteor
            Alias JusticaCLPlus
            Alias Preston
            Alias Saphire
            Alias Scout
            Alias Stiletto
            Alias Wallup
          Cultivar Derrimut
            Command:
              [Phenology].MinimumLeafNumber.FixedValue = 6
              [Phenology].VrnSensitivity.FixedValue = 0
              [Phenology].PpSensitivity.FixedValue = 4
              [Structure].Phyllochron.BasePhyllochron.FixedValue = 100
          Cultivar EGAGregory
            Command:
              [Phenology].MinimumLeafNumber.FixedValue = 6
              [Phenology].VrnSensitivity.FixedValue = 1
              [Phenology].PpSensitivity.FixedValue = 4
              [Structure].Phyllochron.BasePhyllochron.FixedValue = 100
            Alias Gregory
            Alias Lancer
          Cultivar GattonHartog
            Command:
              [Phenology].MinimumLeafNumber.FixedValue = 8
              [Phenology].VrnSensitivity.FixedValue = 0
              [Phenology].PpSensitivity.FixedValue = 4
          Cultivar Gamenya
            Command:
              [Phenology].MinimumLeafNumber.FixedValue = 5
              [Phenology].VrnSensitivity.FixedValue = 0
              [Phenology].PpSensitivity.FixedValue = 3.5
              [Structure].Phyllochron.BasePhyllochron.FixedValue = 100
              [Phenology].EarlyReproductivePpSensitivity.FixedValue = 0
              [Phenology].EarlyReproductiveLongDayBase.FixedValue
          Cultivar Gauntlet
            Command:
              [Phenology].MinimumLeafNumber.FixedValue = 5
              [Phenology].VrnSensitivity.FixedValue = 0
              [Phenology].PpSensitivity.FixedValue = 4
              [Structure].Phyllochron.BasePhyllochron.FixedValue = 100
            Alias Braewood
            Alias Chara
            Alias Clearfield_stl
            Alias Drysdale
            Alias Envoy
            Alias Estoc
            Alias Giles
            Alias Harper
            Alias Krichauff
            Alias Magenta
            Alias Mitch
            Alias Phantom
            Alias Pugsley
            Alias Sentinel
            Alias Silverstar
            Alias Suneca
            Alias Sunlin
            Alias Sunvale
            Alias Trojan
            Alias Strzelecki
          Cultivar Gladius
            Command:
              [Phenology].MinimumLeafNumber.FixedValue = 6
              [Phenology].VrnSensitivity.FixedValue = 0
              [Phenology].PpSensitivity.FixedValue = 5
              [Structure].Phyllochron.BasePhyllochron.FixedValue = 100
          Cultivar Gutha
            Command:
              [Phenology].MinimumLeafNumber.FixedValue = 6
              [Phenology].VrnSensitivity.FixedValue = 0
              [Phenology].PpSensitivity.FixedValue = 5
              [Structure].Phyllochron.BasePhyllochron.FixedValue = 100
              [Grain].MaximumPotentialGrainSize.FixedValue = 0.041
              [Grain].NumberFunction.GrainNumber.GrainsPerGramOfStem.FixedValue = 17
          Cultivar H45
            Command:
              [Phenology].MinimumLeafNumber.FixedValue = 6
              [Phenology].VrnSensitivity.FixedValue = 0
              [Phenology].PpSensitivity.FixedValue = 4
              [Structure].Phyllochron.BasePhyllochron.FixedValue = 100
            Alias Saintly
            Alias Tamarinrock
            Alias Waagin
            Alias Wollaroi
            Alias Zippy
          Cultivar H46
            Command:
              [Phenology].MinimumLeafNumber.FixedValue = 8
              [Phenology].VrnSensitivity.FixedValue = 0
              [Phenology].PpSensitivity.FixedValue = 4
              [Structure].Phyllochron.BasePhyllochron.FixedValue = 100
          Cultivar Hartog
            Command:
              [Phenology].MinimumLeafNumber.FixedValue = 6
              [Phenology].VrnSensitivity.FixedValue = 0
              [Phenology].PpSensitivity.FixedValue = 5
              [Structure].Phyllochron.BasePhyllochron.FixedValue = 100
              [Grain].MaximumPotentialGrainSize.FixedValue = 0.041
            Alias Annuello
            Alias Carnamah
            Alias Catalina
            Alias CLF_Stiletto
            Alias Cobra
            Alias Corack
            Alias Correll
            Alias Diamondbird
            Alias Goroke
            Alias GrenadeCLPlus
            Alias Guardian
            Alias Halbred
            Alias Impala
            Alias Justica
            Alias Kord
            Alias Merlin
            Alias Mitre
            Alias Peake
            Alias Shield
            Alias Spitfire
            Alias Sunguard
            Alias Sunstate
            Alias Yallaroi
            Alias Yawa
          Cultivar Hibred_Mercury
            Command:
              [Phenology].MinimumLeafNumber.FixedValue = 6
              [Phenology].VrnSensitivity.FixedValue = 0
              [Phenology].PpSensitivity.FixedValue = 4
              [Structure].Phyllochron.BasePhyllochron.FixedValue = 100
            Alias Scythe
            Alias Arrino
            Alias Bonnie_rock
            Alias Bowerbird
            Alias Condo
            Alias Dart
            Alias Dollarbird
            Alias Emurock
            Alias Hyperno
            Alias ImposeCLPlus
            Alias Kalka
            Alias Kirchauff
            Alias Kukri
            Alias Hunter
            Alias LRPBArrow
            Alias Ouyen
            Alias Tamaroi
            Alias Katana
          Cultivar Janz
            Command:
              [Phenology].MinimumLeafNumber.FixedValue = 6
              [Phenology].VrnSensitivity.FixedValue = 1
              [Phenology].PpSensitivity.FixedValue = 4
              [Structure].Phyllochron.BasePhyllochron.FixedValue = 100
          Cultivar Kelallac
            Command:
              [Phenology].MinimumLeafNumber.FixedValue = 8
              [Phenology].VrnSensitivity.FixedValue = 0
              [Phenology].PpSensitivity.FixedValue = 4
              [Structure].Phyllochron.BasePhyllochron.FixedValue = 100
            Alias Beaufort
            Alias Calingiri
            Alias Endure
            Alias Forrest
            Alias Scenario
            Alias Zen
          Cultivar Kennedy
            Command:
              [Phenology].MinimumLeafNumber.FixedValue = 8
              [Phenology].VrnSensitivity.FixedValue = 0
              [Phenology].PpSensitivity.FixedValue = 4
              [Structure].Phyllochron.BasePhyllochron.FixedValue = 100
          Cultivar Lang
            Command:
              [Phenology].MinimumLeafNumber.FixedValue = 6
              [Phenology].VrnSensitivity.FixedValue = 0
              [Phenology].PpSensitivity.FixedValue = 5
              [Structure].Phyllochron.BasePhyllochron.FixedValue = 100
          Cultivar Livingston
            Command:
              [Phenology].MinimumLeafNumber.FixedValue = 5
              [Phenology].VrnSensitivity.FixedValue = 0
              [Phenology].PpSensitivity.FixedValue = 4
              [Structure].Phyllochron.BasePhyllochron.FixedValue = 100
          Cultivar Lincoln
            Command:
              [Phenology].MinimumLeafNumber.FixedValue = 6
              [Phenology].VrnSensitivity.FixedValue = 0
              [Phenology].PpSensitivity.FixedValue = 4
              [Structure].Phyllochron.BasePhyllochron.FixedValue = 100
            Alias Crusader
          Cultivar Mace
            Command:
              [Phenology].MinimumLeafNumber.FixedValue = 6
              [Phenology].VrnSensitivity.FixedValue = 0
              [Phenology].PpSensitivity.FixedValue = 4
              [Structure].Phyllochron.BasePhyllochron.FixedValue = 100
          Cultivar MacKellar
            Command:
              [Phenology].MinimumLeafNumber.FixedValue = 7
              [Phenology].VrnSensitivity.FixedValue = 5
              [Phenology].PpSensitivity.FixedValue = 5
              [Phenology].EarlyReproductiveLongDayBase.FixedValue = 3.5
              [Structure].Phyllochron.BasePhyllochron.FixedValue = 100
            Alias Adagio
            Alias Brennan
            Alias Declic
            Alias Revenue
          Cultivar Matong
            Command:
              [Phenology].MinimumLeafNumber.FixedValue = 7
              [Phenology].VrnSensitivity.FixedValue = 1
              [Phenology].PpSensitivity.FixedValue = 4
              [Structure].Phyllochron.BasePhyllochron.FixedValue = 100
          Cultivar McCubbin
            Command:
              [Phenology].MinimumLeafNumber.FixedValue = 8
              [Phenology].VrnSensitivity.FixedValue = 0
              [Phenology].PpSensitivity.FixedValue = 5
              [Structure].Phyllochron.BasePhyllochron.FixedValue = 90
          Cultivar Mercury
            Command:
              [Phenology].MinimumLeafNumber.FixedValue = 7
              [Phenology].VrnSensitivity.FixedValue = 0
              [Phenology].PpSensitivity.FixedValue = 4
              [Phenology].EarlyReproductiveLongDayBase.FixedValue = 3.5
              [Structure].Phyllochron.BasePhyllochron.FixedValue = 80
          Cultivar Ruby
            Command:
              [Phenology].MinimumLeafNumber.FixedValue = 8
              [Phenology].VrnSensitivity.FixedValue = 0
              [Phenology].PpSensitivity.FixedValue = 4
              [Structure].Phyllochron.BasePhyllochron.FixedValue = 100
          Cultivar Spear
            Command:
              [Phenology].MinimumLeafNumber.FixedValue = 6
              [Phenology].VrnSensitivity.FixedValue = 0
              [Phenology].PpSensitivity.FixedValue = 4
              [Structure].Phyllochron.BasePhyllochron.FixedValue = 100
              [Grain].MaximumPotentialGrainSize.FixedValue = 0.045
          Cultivar Sunbri
            Command:
              [Phenology].MinimumLeafNumber.FixedValue = 7
              [Phenology].VrnSensitivity.FixedValue = 0
              [Phenology].PpSensitivity.FixedValue = 5
              [Structure].Phyllochron.BasePhyllochron.FixedValue = 100
          Cultivar Sunco
            Command:
              [Phenology].MinimumLeafNumber.FixedValue = 6.5
              [Phenology].VrnSensitivity.FixedValue = 0
              [Phenology].PpSensitivity.FixedValue = 3.5
              [Phenology].EarlyReproductivePpSensitivity.FixedValue = 4
              [Structure].Phyllochron.BasePhyllochron.FixedValue = 100
            Alias Advantage
            Alias Bellaroi
            Alias Caparoi
            Alias Ellison
            Alias Suntop
          Cultivar Ventura
            Command:
              [Phenology].MinimumLeafNumber.FixedValue = 8
              [Phenology].VrnSensitivity.FixedValue = 0
              [Phenology].PpSensitivity.FixedValue = 4
              [Structure].Phyllochron.BasePhyllochron.FixedValue = 100
          Cultivar Wedgetail
            Command:
              [Phenology].MinimumLeafNumber.FixedValue = 8
              [Phenology].VrnSensitivity.FixedValue = 0
              [Phenology].PpSensitivity.FixedValue = 4
              [Structure].Phyllochron.BasePhyllochron.FixedValue = 100
            Alias Lorikeet
            Alias Rosella
            Alias Whistler
            Alias Wylah
            Alias Eaglehawk
          Cultivar Westonia
            Command:
              [Phenology].MinimumLeafNumber.FixedValue = 5
              [Phenology].VrnSensitivity.FixedValue = 0
              [Phenology].PpSensitivity.FixedValue = 4
              [Structure].Phyllochron.BasePhyllochron.FixedValue = 100
          Cultivar Wilgoyne
            Command:
              [Phenology].MinimumLeafNumber.FixedValue = 5
              [Phenology].VrnSensitivity.FixedValue = 0
              [Phenology].PpSensitivity.FixedValue = 4
              [Structure].Phyllochron.BasePhyllochron.FixedValue = 100
              [Grain].NumberFunction.GrainNumber.GrainsPerGramOfStem.FixedValue = 20
              [Grain].MaximumPotentialGrainSize.FixedValue = 0.045
          Cultivar Wyalkatchem
            Command:
              [Phenology].MinimumLeafNumber.FixedValue = 8
              [Phenology].VrnSensitivity.FixedValue = 0
              [Phenology].PpSensitivity.FixedValue = 4
              [Structure].Phyllochron.BasePhyllochron.FixedValue = 100
          Cultivar Yitpi
            Command:
              [Phenology].MinimumLeafNumber.FixedValue = 8
              [Phenology].VrnSensitivity.FixedValue = 0
              [Phenology].PpSensitivity.FixedValue = 5
              [Phenology].EarlyReproductiveLongDayBase.FixedValue = 2.5
              [Phenology].EarlyReproductivePpSensitivity.FixedValue = 5
              [Structure].Phyllochron.BasePhyllochron.FixedValue = 80
          Cultivar Young
            Command:
              [Phenology].MinimumLeafNumber.FixedValue = 8
              [Phenology].VrnSensitivity.FixedValue = 0
              [Phenology].PpSensitivity.FixedValue = 4
              [Structure].Phyllochron.BasePhyllochron.FixedValue = 100
        Folder Turkey
          Cultivar Konya
            Command:
              [Phenology].MinimumLeafNumber.FixedValue = 7
              [Phenology].VrnSensitivity.FixedValue = 0
              [Phenology].PpSensitivity.FixedValue = 4
              [Structure].Phyllochron.BasePhyllochron.FixedValue = 100
              [Grain].NumberFunction.GrainNumber.GrainsPerGramOfStem.FixedValue = 15
              [Grain].MaximumPotentialGrainSize.FixedValue = 0.050
              [Grain].MaximumNConc.FixedValue = 0.026
              [Phenology].GrainFilling.Target.FixedValue = 800
        Folder China
          Cultivar Keyu13
            Command:
              [Phenology].MinimumLeafNumber.FixedValue = 7
              [Phenology].VrnSensitivity.FixedValue = 5
              [Phenology].PpSensitivity.FixedValue = 3
              [Structure].Phyllochron.BasePhyllochron.FixedValue = 100
        Folder USA
          Cultivar Yecora
            Command:
              [Phenology].MinimumLeafNumber.FixedValue = 6
              [Phenology].VrnSensitivity.FixedValue = 0
              [Phenology].PpSensitivity.FixedValue = 4
              [Structure].Phyllochron.BasePhyllochron.FixedValue = 90
              [Leaf].CohortParameters.MaxArea.AreaLargestLeaves.FixedValue = 4000
          Cultivar Rex
            Command:
              [Phenology].MinimumLeafNumber.FixedValue = 7
              [Phenology].VrnSensitivity.FixedValue = 6
              [Phenology].PpSensitivity.FixedValue = 4
              [Grain].NumberFunction.GrainNumber.GrainsPerGramOfStem.FixedValue = 18
              [Grain].MaximumNConc.FixedValue = 0.02
          Cultivar Nugaines
            Command:
              [Phenology].MinimumLeafNumber.FixedValue = 7
              [Phenology].VrnSensitivity.FixedValue = 6
              [Phenology].PpSensitivity.FixedValue = 4
              [Grain].NumberFunction.GrainNumber.GrainsPerGramOfStem.FixedValue = 20
              [Grain].MaximumNConc.FixedValue = 0.02
          Cultivar Hyslop
            Command:
              [Phenology].MinimumLeafNumber.FixedValue = 7
              [Phenology].VrnSensitivity.FixedValue = 6
              [Phenology].PpSensitivity.FixedValue = 4
              [Grain].NumberFunction.GrainNumber.GrainsPerGramOfStem.FixedValue = 22
              [Grain].MaximumNConc.FixedValue = 0.02
          Cultivar Stephens
            Command:
              [Phenology].MinimumLeafNumber.FixedValue = 7
              [Phenology].VrnSensitivity.FixedValue = 6
              [Phenology].PpSensitivity.FixedValue = 4
              [Grain].NumberFunction.GrainNumber.GrainsPerGramOfStem.FixedValue = 25
              [Grain].MaximumNConc.FixedValue = 0.02
        Folder Europe
          Cultivar Dekan
            Command:
              [Phenology].MinimumLeafNumber.FixedValue = 9
              [Phenology].VrnSensitivity.FixedValue = 7
              [Phenology].PpSensitivity.FixedValue = 3
              [Phenology].EarlyReproductivePpSensitivity.FixedValue = 3
              [Structure].Phyllochron.BasePhyllochron.FixedValue = 100
              [Leaf].ExtinctionCoeff.FixedValue = 0.8
          Cultivar Rosario
            Command:
              [Phenology].MinimumLeafNumber.FixedValue = 9
              [Phenology].VrnSensitivity.FixedValue = 7
              [Phenology].PpSensitivity.FixedValue = 3
              [Phenology].EarlyReproductivePpSensitivity.FixedValue = 3
              [Structure].Phyllochron.BasePhyllochron.FixedValue = 100
              [Leaf].ExtinctionCoeff.FixedValue = 0.8
          Cultivar Ararat
            Command:
              [Phenology].MinimumLeafNumber.FixedValue = 9
              [Phenology].VrnSensitivity.FixedValue = 7
              [Phenology].PpSensitivity.FixedValue = 3
              [Phenology].EarlyReproductivePpSensitivity.FixedValue = 3
              [Structure].Phyllochron.BasePhyllochron.FixedValue = 100
              [Leaf].ExtinctionCoeff.FixedValue = 0.8
        Folder Africa
          Cultivar HAR1685
            Command:
              [Phenology].MinimumLeafNumber.FixedValue = 7
              [Phenology].VrnSensitivity.FixedValue = 0
              [Phenology].PpSensitivity.FixedValue = 3
              [Structure].Phyllochron.BasePhyllochron.FixedValue = 100
              [Grain].NumberFunction.GrainNumber.GrainsPerGramOfStem.FixedValue = 17
              [Phenology].GrainFilling.Target.FixedValue = 350
        Folder Iran
          Cultivar Gorgan
            Command:
              [Phenology].MinimumLeafNumber.FixedValue = 7
              [Phenology].VrnSensitivity.FixedValue = 0
              [Phenology].PpSensitivity.FixedValue = 4
              [Structure].Phyllochron.BasePhyllochron.FixedValue = 100
      Constant MortalityRate: FixedValue=0
      Constant SeedMortalityRate: FixedValue=0
    Report HarvestReport: EventNames=[Wheat].Harvesting
      VariableNames:
        [Clock].Today
        [Wheat].Phenology.CurrentPhase.Name
        [Wheat].Phenology.CurrentStageName
        [Wheat].Phenology.FlagLeafDAS
        [Wheat].Phenology.FloweringDAS
        [Wheat].Phenology.MaturityDAS
        [Wheat].Grain.Wt
        [Wheat].Grain.N
        [Wheat].Grain.Number
        [Wheat].Grain.NConc
        [Wheat].AboveGround.Wt
        [Wheat].AboveGround.N
        [Wheat].Grain.Protein
        [Wheat].Grain.Size
        [Wheat].Structure.HaunStage
        [Wheat].Leaf.FinalLeafNumber
        [Wheat].Leaf.MainStemPopulation
        [Wheat].SowingData.Cultivar
        [Wheat].SowingDate.DayOfYear
        [Wheat].Leaf.CohortMaxSize
        [Clock].StartDate
    Report DailyReport: EventNames=[Clock].DoReport
      VariableNames:
        [Clock].Today
        [Weather].Mint
        [Soil].Water.Volumetric
        sum([Soil].Water.MM) as ProfileWater
        ([Soil].SoilWater.Eo * [Wheat].Leaf.CoverGreen) as ETestimate
        sum([Soil].NO3.kgha) as TotalNO3
        [Wheat].AboveGround.N
        [Wheat].AboveGround.Wt
        [Wheat].AboveGroundLive.N
        [Wheat].AboveGroundLive.Wt
        [Wheat].AboveGroundDead.N
        [Wheat].AboveGroundDead.Wt
        [Wheat].Arbitrator.DM.TotalPlantDemand
        [Wheat].Arbitrator.DM.TotalFixationSupply
        [Wheat].Arbitrator.DM.NotAllocated
        [Wheat].Ear.N
        [Wheat].Ear.NConc
        [Wheat].Ear.Wt
        [Wheat].Grain.N
        [Wheat].Grain.NConc
        [Wheat].Grain.Number
        [Wheat].Grain.Size
        [Wheat].Grain.Wt
        [Wheat].Leaf.Tips
        [Wheat].Leaf.CoverDead
        [Wheat].Leaf.CoverGreen
        [Wheat].Leaf.CoverTotal
        [Wheat].Leaf.Dead.N
        [Wheat].Leaf.Dead.NConc
        [Wheat].Leaf.Dead.Wt
        [Wheat].Leaf.DeadCohortNo
        [Wheat].Leaf.SenescingCohortNo
        [Wheat].Leaf.Ligules
        [Wheat].Leaf.Fn
        [Wheat].Leaf.Fw
        [Wheat].Leaf.Height
        [Wheat].Leaf.InitialisedCohortNo
        [Wheat].Leaf.LAI
        [Wheat].Leaf.Live.N
        [Wheat].Leaf.Live.NConc
        [Wheat].Leaf.Live.Wt
        [Wheat].Leaf.SpecificArea
        [Wheat].Leaf.Transpiration
        [Wheat].Leaf.Photosynthesis.FVPD
        [Wheat].Phenology.CurrentPhase.Name
        [Wheat].Phenology.CurrentStageName
        [Wheat].Phenology.DailyVernalisation
        [Weather].MeanT
        [Wheat].Phenology.Photoperiod
        [Wheat].Phenology.Stage
        [Wheat].Phenology.ThermalTime
        [Wheat].Phenology.Vrn1
        [Wheat].Phenology.Vrn4
        [Wheat].Phenology.Zadok.Stage
        [Wheat].Root.Depth
        [Wheat].Root.N
        [Wheat].Root.Wt
        [Wheat].Root.NConc
        [Wheat].Root.WaterUptake
        [Wheat].Root.WaterTensionFactor
        [Wheat].Root.RootFrontVelocity.TemperatureFactor
        [Wheat].Spike.N
        [Wheat].Spike.NConc
        [Wheat].Spike.Wt
        [Wheat].Spike.Live.StorageWt
        [Wheat].Stem.N
        [Wheat].Stem.NConc
        [Wheat].Stem.Wt
        [Wheat].Stem.PercentWSC
        [Wheat].Stem.Live.StorageWt
        [Wheat].StemPlusSpike.Wt
        [Wheat].StemPlusSpike.N
        [Wheat].SowingData.Cultivar
        [Wheat].Structure.HaunStage
        [Wheat].Structure.HaunStage
        [Wheat].Leaf.Height
        [Wheat].Leaf.Tips
        [Wheat].Leaf.FinalLeafNumber
        [Wheat].Leaf.MainStemPopulation
        [Wheat].Structure.MeanTillerGrowthRate
        [Wheat].Leaf.StemPopulation
        [Wheat].Total.N
        [Wheat].Total.Wt
        [SurfaceOrganicMatter].Wt
        ([Wheat].Leaf.Transpiration + [Soil].SoilWater.Es + [MicroClimate].PrecipitationInterception) as ET
        sum([Soil].NO3.kgha) as TotalSoilNitrogen
    Manager MaxLeafSize (disabled)
```csharp
using Models.Soils;
using APSIM.Shared.Utilities;
using Models.Soils.Arbitrator;
using Models.PMF.Organs;
using Models.PMF;
using Models.Interfaces;
using Models.Core;
using System.Xml.Serialization;
using System.Collections.Generic;
using System;
using Newtonsoft.Json;



namespace Models
{
    [Serializable] 
    public class Script : Model
    {
        [Link] Clock Clock;
        [Link] Plant Wheat;
        
        public event EventHandler LeafReport;
        
        [JsonIgnore] public int LeafPosition { get; set; }
        [JsonIgnore] public double MaxLeafSize { get; set; }
        
        [EventSubscribe("DoManagement")]
        private void OnDoManagement(object sender, EventArgs e)
        {
            var leaf = Wheat.Leaf as Leaf;
            if ((leaf.ExpandedCohortNo > LeafPosition) & (Wheat.Structure.NextLeafProportion == 1))
            {
                LeafPosition = (int)
                leaf.ExpandedCohortNo;
                MaxLeafSize = leaf.CohortSize[LeafPosition - 1];
                LeafReport.Invoke(this, new EventArgs());
            }
        }
    }
}
```
    Report MaxLeafSizeReport: EventNames=[MaxLeafSize].Script.LeafReport
      VariableNames:
        [MaxLeafSize].Script.MaxLeafSize
        [MaxLeafSize].Script.LeafPosition
    Manager Harvesting
```csharp
using Models.PMF.Phen;
using System;
using Models.Core;
using System.Collections.Generic;
using System.Text;
using Models.Soils;
using Models.PMF;
using Models;
using System.Xml.Serialization;
using APSIM.Shared.Utilities;

namespace Models
{
    [Serializable] 
    public class Script : Model
    {
        [Link] private Plant Wheat;
        [Link(Type = LinkType.Path, Path = "[Wheat].Phenology")]
        private Phenology phenology;
        [EventSubscribe("DoManagement")]
        private void OnDoManagement(object sender, EventArgs e)
        {
            if (phenology.CurrentPhase.Name == "Maturing")
            {
                Wheat.Harvest();
                Wheat.EndCrop();
            }
        }
    }
}
```
  DataStore
    ExcelInput Observed: FileNames=[..\..\Tests\Validation\Wheat\data\Observed.xlsx]; SheetNames=[Observed, MaxLeafSize]
    PredictedObserved HarvestObsPred: PredictedTableName=HarvestReport; ObservedTableName=Observed; FieldNameUsedForMatch=SimulationName; FieldName2UsedForMatch=Wheat.Phenology.CurrentStageName; AllColumns=false
      Tests: POName=HarvestObsPred
        AcceptedStats:
          Name                  n   Slope     Intercept  SEslope    SEintercept  R2        RMSE     NSE        ME        MAE      RSR       RMR
          Wheat.AboveGround.N   16  0.984659  -1.17025   0.0927734  1.42398      0.889458  2.47369  0.823829   -1.38766  2.20712  0.406399  0
          Wheat.AboveGround.Wt  23  0.5671    809.577    0.133219   201.794      0.463208  351.413  0.247424   177.72    268.599  0.848443  0
          Wheat.Grain.Number    23  0.418175  8783.38    0.103456   1906.84      0.437575  4127.13  0.34837    -1519.63  3463.49  0.789493  0
          Wheat.Grain.Wt        23  0.600276  195.4      0.223423   135.213      0.255806  202.197  -0.246303  -35.4199  170.577  1.09184   0
        AcceptedStatsName=Name n Slope Intercept SEslope SEintercept R2 RMSE NSE ME MAE RSR
  Folder Validation
    Memo
      A test dataset has been developed to test the APSIM Wheat model for a range of environmental (soil and climate) conditions, management options (sowing dates, populations, nitrogen rates, row spacing, irrigation), genetic backgrounds (different regions, cultivar types) and for special considerations such as crop damage.  These tests have been groups into various geographical regions to allow the user to evaluate the suitability of the model for their particular region of interest.  Graphs of model performance are provided for yield, biomass production, canopy development, phenological development, water and nitrogen uptake, and grain yield components.
    Folder New Zealand
      Experiment Lincoln9192
        Memo
          This is a water response trial run in the rain out shelter at Plant and Food Research in Lincoln, New Zealand.  It is described in full by [Jamieson_WaterResponse_1995] but briefly.  A winter crop of 'Batten' wheat was sown at 300 plants/m^2^ on the 8th of June 1991 and range of irrigation amount and timing treatments were applied.  Six of these treatments have been included in this validation:

          01. Full irrigation where measured ET was replaced weekly
          03. Short Early Drought where irrigation was withheld from sowing until late October then full irrigation was applied
          05. Long Early Drought where irrigation was withheld from sowing until mid December then full irrigation was applied
          06. Long Late Drought where full irrigation was applied from sowing until mid September then withheld for the rest of the season
          07. Moderate Late Drought where full irrigation was applied from sowing until mid October then withheld for the rest of the season
          08. Short Late Drought where full irrigation was applied from sowing until Early November then withheld for the rest of the season
          11. Nil where no water was applied and the crop grew on soil stored water only.

          Irrigation was applied at weekly intervals through and assemply of low rate drip emitters on each plot.  Soil water content was measured weekly with a neutron probe and biomass was measured at 10 - 14 day intervals.  Samples throughtout the crop were from two 0.1m^2^ quatrants and the final harvest sample was from a 1 m^2^ quadrant.  Each treatment was replicated twice and there was considerable soil variation from plot to plot so each treatment was initianilised with unique soil parameters which best described the soil they were growing on.
        Factors
          Factor Irrig
            CompositeFactor 01
              Specifications:
                [IrrigationEvents]
                [Physical]
              Operations IrrigationEvents
                1991-06-10  [Irrigation].Apply(7);
                1991-08-16  [Irrigation].Apply(7);
                1991-08-29  [Irrigation].Apply(20);
                1991-09-07  [Irrigation].Apply(12);
                1991-09-12  [Irrigation].Apply(22);
                1991-09-19  [Irrigation].Apply(4);
                1991-09-26  [Irrigation].Apply(7);
                1991-10-03  [Irrigation].Apply(27);
                1991-10-10  [Irrigation].Apply(18);
                1991-10-17  [Irrigation].Apply(30);
                1991-10-24  [Irrigation].Apply(42);
                1991-10-31  [Irrigation].Apply(33);
                1991-11-07  [Irrigation].Apply(24);
                1991-11-14  [Irrigation].Apply(28);
                1991-11-21  [Irrigation].Apply(37);
                1991-11-27  [Irrigation].Apply(51);
                1991-12-05  [Irrigation].Apply(36);
                1991-12-12  [Irrigation].Apply(38);
                1991-12-19  [Irrigation].Apply(35);
                1991-12-26  [Irrigation].Apply(47);
                1992-01-03  [Irrigation].Apply(40);
                1992-01-09  [Irrigation].Apply(41);
              Physical
                Thickness  BD   AirDry  LL15  DUL   SAT
                200        1.3  0.08    0.08  0.29  0.44
                200        1.3  0.07    0.07  0.3   0.4
                200        1.3  0.07    0.07  0.28  0.4
                200        1.3  0.09    0.09  0.26  0.38
                200        1.3  0.11    0.11  0.26  0.38
                200        1.3  0.16    0.16  0.28  0.38
                200        1.3  0.15    0.15  0.27  0.38
                200        1.3  0.12    0.12  0.22  0.38
                SoilCrop WheatSoil: LL=[0.08, 0.07, 0.07, 0.09, 0.11, 0.16, 0.15, 0.12]; KL=[0.05, 0.03, 0.02, 0.03, 0.03, 0.03, 0.01, 0.01]; XF=[1, 1, 1, 1, 1, 1, 1, 1]
            CompositeFactor 03
              Specifications:
                [IrrigationEvents]
                [Physical]
                [Soil].Water.InitialValues = 0.279,0.2677,0.2491,0.27045,0.311,0.25355,0.27635,0.1422
              Operations IrrigationEvents
                1991-06-10  [Irrigation].Apply(7);
                1991-08-16  [Irrigation].Apply(7);
                1991-08-29  [Irrigation].Apply(20);
                1991-09-26  [Irrigation].Apply(7);
                1991-10-24  [Irrigation].Apply(42);
                1991-10-31  [Irrigation].Apply(33);
                1991-11-07  [Irrigation].Apply(24);
                1991-11-14  [Irrigation].Apply(28);
                1991-11-21  [Irrigation].Apply(37);
                1991-11-27  [Irrigation].Apply(51);
                1991-12-05  [Irrigation].Apply(36);
                1991-12-12  [Irrigation].Apply(38);
                1991-12-19  [Irrigation].Apply(35);
                1991-12-26  [Irrigation].Apply(47);
                1992-01-03  [Irrigation].Apply(40);
                1992-01-09  [Irrigation].Apply(41);
              Physical
                Thickness  BD   AirDry  LL15  DUL      SAT
                200        1.3  0.05    0.08  0.279    0.44
                200        1.3  0.05    0.12  0.2677   0.44
                200        1.3  0.05    0.12  0.26     0.44
                200        1.3  0.05    0.12  0.27045  0.44
                200        1.3  0.05    0.15  0.311    0.44
                200        1.3  0.05    0.16  0.25355  0.44
                200        1.3  0.05    0.15  0.27635  0.44
                200        1.3  0.05    0.08  0.1422   0.44
                SoilCrop WheatSoil: LL=[0.08, 0.12, 0.12, 0.12, 0.15, 0.16, 0.15, 0.08]; KL=[0.05, 0.03, 0.02, 0.03, 0.03, 0.03, 0.01, 0.01]; XF=[1, 1, 1, 1, 1, 1, 1, 1]
            CompositeFactor 05
              Specifications:
                [IrrigationEvents]
                [Physical]
                [Soil].Water.InitialValues = 0.2655,0.27,0.209,0.31145,0.3079,0.3007,0.28705,0.3117
              Operations IrrigationEvents
                1991-06-10  [Irrigation].Apply(7);
                1991-08-16  [Irrigation].Apply(7);
                1991-08-29  [Irrigation].Apply(20);
                1991-09-26  [Irrigation].Apply(7);
                1991-12-19  [Irrigation].Apply(35);
                1991-12-26  [Irrigation].Apply(47);
                1992-01-03  [Irrigation].Apply(40);
              Physical
                Thickness  BD   AirDry  LL15  DUL      SAT
                200        1.3  0.06    0.06  0.31     0.44
                200        1.3  0.09    0.09  0.3      0.44
                200        1.3  0.07    0.07  0.28     0.44
                200        1.3  0.12    0.12  0.31145  0.44
                200        1.3  0.16    0.16  0.3079   0.44
                200        1.3  0.16    0.16  0.3007   0.44
                200        1.3  0.15    0.15  0.28705  0.44
                200        1.3  0.16    0.16  0.3117   0.44
                SoilCrop WheatSoil: LL=[0.06, 0.09, 0.07, 0.12, 0.16, 0.16, 0.15, 0.16]; KL=[0.05, 0.03, 0.02, 0.03, 0.03, 0.03, 0.01, 0.01]; XF=[1, 1, 1, 1, 1, 1, 1, 1]
            CompositeFactor 06
              Specifications:
                [IrrigationEvents]
                [Physical]
                [Soil].Water.InitialValues = 0.2805,0.27965,0.27,0.296,0.23105,0.2453,0.2042,0.15605
              Operations IrrigationEvents
                1991-06-10  [Irrigation].Apply(7);
                1991-08-16  [Irrigation].Apply(7);
                1991-08-29  [Irrigation].Apply(20);
                1991-09-07  [Irrigation].Apply(12);
                1991-09-12  [Irrigation].Apply(22);
                1991-09-19  [Irrigation].Apply(14);
                1991-09-26  [Irrigation].Apply(7);
              Physical
                Thickness  BD   AirDry  LL15  DUL    SAT
                200        1.3  0.08    0.08  0.281  0.44
                200        1.3  0.08    0.08  0.28   0.44
                200        1.3  0.09    0.09  0.27   0.44
                200        1.3  0.12    0.12  0.296  0.44
                200        1.3  0.11    0.11  0.231  0.44
                200        1.3  0.16    0.16  0.245  0.44
                200        1.3  0.1     0.1   0.204  0.44
                200        1.3  0.08    0.08  0.156  0.44
                SoilCrop WheatSoil: LL=[0.08, 0.08, 0.09, 0.12, 0.11, 0.16, 0.1, 0.08]; KL=[0.05, 0.03, 0.02, 0.03, 0.03, 0.03, 0.01, 0.01]; XF=[1, 1, 1, 1, 1, 1, 1, 1]
            CompositeFactor 07
              Specifications:
                [IrrigationEvents]
                [Physical]
                [Soil].Water.InitialValues = 0.278,0.26825,0.25355,0.2364,0.2635,0.27705,0.3392,0.2
              Operations IrrigationEvents
                1991-06-10  [Irrigation].Apply(7);
                1991-08-16  [Irrigation].Apply(7);
                1991-08-29  [Irrigation].Apply(20);
                1991-09-07  [Irrigation].Apply(12);
                1991-09-12  [Irrigation].Apply(22);
                1991-09-19  [Irrigation].Apply(14);
                1991-09-26  [Irrigation].Apply(7);
                1991-10-03  [Irrigation].Apply(27);
                1991-10-10  [Irrigation].Apply(18);
                1991-10-17  [Irrigation].Apply(30);
              Physical
                Thickness  BD   AirDry  LL15  DUL      SAT
                200        1.3  0.08    0.08  0.31     0.44
                200        1.3  0.07    0.07  0.27     0.44
                200        1.3  0.06    0.06  0.25355  0.44
                200        1.3  0.09    0.09  0.2364   0.44
                200        1.3  0.15    0.15  0.2635   0.44
                200        1.3  0.16    0.16  0.27705  0.44
                200        1.3  0.15    0.15  0.3392   0.44
                200        1.3  0.08    0.08  0.2      0.44
                SoilCrop WheatSoil: LL=[0.08, 0.07, 0.06, 0.09, 0.15, 0.16, 0.15, 0.08]; KL=[0.05, 0.03, 0.02, 0.03, 0.03, 0.03, 0.01, 0.01]; XF=[1, 1, 1, 1, 1, 1, 1, 1]
            CompositeFactor 08
              Specifications:
                [IrrigationEvents]
                [Physical]
                [Soil].Water.InitialValues = 0.281,0.2785,0.2754,0.2698,0.252,0.26715,0.2623,0.1995
              Operations IrrigationEvents
                1991-06-10  [Irrigation].Apply(7);
                1991-08-16  [Irrigation].Apply(7);
                1991-08-29  [Irrigation].Apply(20);
                1991-09-07  [Irrigation].Apply(12);
                1991-09-12  [Irrigation].Apply(22);
                1991-09-19  [Irrigation].Apply(14);
                1991-09-26  [Irrigation].Apply(7);
                1991-10-03  [Irrigation].Apply(27);
                1991-10-10  [Irrigation].Apply(18);
                1991-10-17  [Irrigation].Apply(30);
                1991-10-24  [Irrigation].Apply(42);
                1991-10-31  [Irrigation].Apply(33);
                1991-11-07  [Irrigation].Apply(24);
              Physical
                Thickness  BD   AirDry  LL15  DUL      SAT
                200        1.3  0.08    0.08  0.31     0.44
                200        1.3  0.12    0.12  0.2785   0.44
                200        1.3  0.09    0.09  0.2754   0.44
                200        1.3  0.09    0.09  0.2698   0.44
                200        1.3  0.13    0.13  0.252    0.44
                200        1.3  0.16    0.16  0.26715  0.44
                200        1.3  0.15    0.15  0.2623   0.44
                200        1.3  0.1     0.1   0.1995   0.44
                SoilCrop WheatSoil: LL=[0.08, 0.12, 0.09, 0.09, 0.13, 0.16, 0.15, 0.1]; KL=[0.05, 0.03, 0.02, 0.03, 0.03, 0.03, 0.01, 0.01]; XF=[1, 1, 1, 1, 1, 1, 1, 1]
            CompositeFactor 11
              Specifications:
                [IrrigationEvents]
                [Physical]
                [Soil].Water.InitialValues = 0.2375,0.2666,0.2634,0.2309,0.23805,0.2339,0.22815,0.1847
              Operations IrrigationEvents
                1991-06-10  [Irrigation].Apply(7);
                1991-08-16  [Irrigation].Apply(7);
                1991-09-26  [Irrigation].Apply(7);
              Physical
                Thickness  BD   AirDry  LL15  DUL      SAT
                200        1.3  0.07    0.07  0.31     0.44
                200        1.3  0.11    0.11  0.2666   0.44
                200        1.3  0.1     0.12  0.2634   0.44
                200        1.3  0.09    0.09  0.2309   0.34
                200        1.3  0.1     0.15  0.23805  0.24
                200        1.3  0.12    0.17  0.2339   0.34
                200        1.3  0.12    0.12  0.22815  0.3
                200        1.3  0.09    0.09  0.1847   0.28
                SoilCrop WheatSoil: LL=[0.07, 0.11, 0.12, 0.09, 0.15, 0.17, 0.12, 0.09]; KL=[0.05, 0.03, 0.02, 0.03, 0.03, 0.03, 0.01, 0.005]; XF=[1, 1, 1, 1, 1, 1, 1, 1]
        Simulation LincolnBase
          Clock: Start=1991-06-08; End=1992-02-28
          Summary summaryfile
          Weather: FileName=../../Tests/Validation/Wheat/met/lincoln.met
          Zone paddock: Area=1; Slope=0; AspectAngle=0; Altitude=50
            Folder Manager folder
              Operations
                1991-06-08  [Wheat].Sow(population:250, cultivar:"BattenSpring", depth:40, rowSpacing:150);
              Operations IrrigationEvents
                1991-08-30  [Irrigation].Apply(0);
                1991-09-08  [Irrigation].Apply(0);
                1991-09-13  [Irrigation].Apply(0);
                1991-09-20  [Irrigation].Apply(0);
                1991-10-04  [Irrigation].Apply(0);
                1991-10-11  [Irrigation].Apply(18);
                1991-10-18  [Irrigation].Apply(30);
                1991-10-25  [Irrigation].Apply(42);
                1991-11-01  [Irrigation].Apply(33);
                1991-11-08  [Irrigation].Apply(24);
                1991-11-15  [Irrigation].Apply(28);
                1991-11-22  [Irrigation].Apply(37);
                1991-11-28  [Irrigation].Apply(51);
                1991-12-06  [Irrigation].Apply(36);
                1991-12-13  [Irrigation].Apply(38);
                1991-12-20  [Irrigation].Apply(35);
                1991-12-27  [Irrigation].Apply(47);
                1992-01-04  [Irrigation].Apply(40);
                1992-01-10  [Irrigation].Apply(41);
              Operations FertiliserEvents
                1991-06-10  [Fertiliser].Apply(30, "NO3N", 0);
                1991-08-16  [Fertiliser].Apply(100, "NO3N",0);
                1991-09-26  [Fertiliser].Apply(50, "NO3N",0);
            Irrigation
            Soil: SoilType=LincolnSoil; LocalName=Lincoln; Site=Lincoln; NearestTown=Unknown; Region=NZ; NaturalVegetation=Unknown; Latitude=0; Longitude=0
              Physical
                Thickness  ParticleSizeSand  ParticleSizeSilt  ParticleSizeClay  Rocks  BD   AirDry  LL15  DUL   SAT
                100        5                 65                30                0      1.3  0.05    0.08  0.31  0.44
                200        5                 65                30                0      1.3  0.05    0.07  0.3   0.44
                200        5                 65                30                0      1.3  0.05    0.07  0.28  0.44
                200        5                 65                30                0      1.3  0.05    0.09  0.31  0.44
                200        5                 65                30                0      1.3  0.05    0.11  0.3   0.44
                200        5                 65                30                0      1.3  0.05    0.16  0.28  0.44
                200        5                 65                30                0      1.3  0.05    0.15  0.3   0.44
                200        5                 65                30                0      1.3  0.05    0.12  0.34  0.44
                Rocks, ParticleSizeSand, ParticleSizeSilt, ParticleSizeClay source: Calculated
                SoilCrop WheatSoil: LL=[0.08, 0.07, 0.07, 0.09, 0.11, 0.16, 0.15, 0.12]; KL=[0.06, 0.06, 0.06, 0.04, 0.03, 0.02, 0.02, 0.02]; XF=[1, 1, 1, 1, 1, 1, 1, 1]
              WaterBalance SoilWater: SummerDate=1-Nov; SummerU=7; SummerCona=3; WinterDate=1-Apr; WinterU=3; WinterCona=2; DiffusConst=0; DiffusSlope=0; Salb=0.2; CN2Bare=75; CNRed=20; CNCov=0.8; DischargeWidth=0; CatchmentArea=0; PSIDul=-100
                Thickness  SWCON  KLAT
                100        0.6    0
                200        0.6    0
                200        0.6    0
                200        0.6    0
                200        0.6    0
                200        0.6    0
                200        0.6    0
                200        0.6    0
              Nutrient
              Organic: FOMCNRatio=0; CarbonUnits=Total
                Thickness  Carbon  SoilCNRatio  FBiom  FInert  FOM
                100        0.35    0            0.04   0.31    0
                200        0.27    0            0.03   0.31    0
                200        0.24    0            0.02   0.31    0
                200        0.16    0            0.01   0.31    0
                200        0.16    0            0.01   0.31    0
                200        0.3     0            0.01   0.25    0
                200        0.1     0            0.01   0.2     0
                200        0.1     0            0.01   0.2     0
              Chemical: PHUnits=Water
                Thickness  PH   CEC
                100        8.5  9.1325
                200        8.5  8.9525
                200        8.6  8.885
                200        8.6  8.705
                200        8.6  8.705
                200        8.6  9.02
                200        8.6  8.57
                200        8.6  8.57
                CEC source: Calculated
              Water: Thickness=[100, 200, 200, 200, 200, 200, 200, 200]; InitialValues=[0.27, 0.3, 0.28, 0.25, 0.24, 0.27, 0.27, 0.21]; InitialPAWmm=229; RelativeTo=LL15; FilledFromTop=false
              Solute NO3: Thickness=[100, 200, 200, 200, 200, 200, 200, 200]; InitialValues=[24.9, 16, 9.8, 9.8, 2.1, 2.1, 2.1, 2.1]; InitialValuesUnits=ppm; WaterTableConcentration=0; D0=0; DepthConstant=0; MaxDepthSoluteAccessible=0; RunoffEffectivenessAtMovingSolute=0; MaxEffectiveRunoff=0
              Solute NH4: Thickness=[100, 200, 200, 200, 200, 200, 200, 200]; InitialValues=[1.3, 1, 1, 0.8, 0.8, 0.5, 0.5, 0.5]; InitialValuesUnits=ppm; WaterTableConcentration=0; D0=0; DepthConstant=0; MaxDepthSoluteAccessible=0; RunoffEffectivenessAtMovingSolute=0; MaxEffectiveRunoff=0
              Solute Urea: Thickness=[100, 200, 200, 200, 200, 200, 200, 200]; InitialValues=[0, 0, 0, 0, 0, 0, 0, 0]; InitialValuesUnits=kg/ha; WaterTableConcentration=0; D0=0; DepthConstant=0; MaxDepthSoluteAccessible=0; RunoffEffectivenessAtMovingSolute=0; MaxEffectiveRunoff=0
              SoilTemperature Temperature
            SurfaceOrganicMatter Surface Organic Matter: InitialResidueName=wheat_stubble; InitialResidueType=wheat; InitialResidueMass=1000; InitialStandingFraction=0; InitialCPR=0; InitialCNR=80
            Fertiliser
            MicroClimate: a_interception=0; b_interception=1; c_interception=0; d_interception=0; SoilHeatFluxFraction=0; MinimumHeightDiffForNewLayer=0; NightInterceptionFraction=0; ReferenceHeight=2
            Plant Wheat
            Manager ResetSW
              reset_date = 09/02/1991 00:00:00
```csharp
using Models.Interfaces;
using System;
using Models.Core;
using Models.PMF;
using Models.PMF.OilPalm;
using Models.Soils;
using Models.Surface;
using APSIM.Shared.Utilities;

namespace Models
{
    [Serializable]
    [System.Xml.Serialization.XmlInclude(typeof(Model))]
    public class Script : Model
    {
        [Link] private Clock Clock;
        [Link] private Soil Soil;
        [Link] private SurfaceOrganicMatter SurfaceOM;
        [Link]
        private ISoilWater waterBalance;
        [Description("Reset date")]
        public DateTime reset_date { get; set; }

        
        [EventSubscribe("DoManagement")]
        private void OnDoManagement(object sender, EventArgs e)
        {
            if (Clock.Today == reset_date)
                waterBalance.Reset();
        }
    }
}
```
            Manager ClimateControl
              StartDate = 06/08/1991 00:00:00
              EndDate = 12/31/1992 00:00:00
```csharp
using Models.Soils;
using System.Xml.Serialization;
using Models;
using Models.PMF;
using System.Text;
using System.Collections.Generic;
using APSIM.Shared.Utilities;
using Models.Core;
using System;
using Models.Climate;

namespace Models
{
    [Serializable] 
    [System.Xml.Serialization.XmlInclude(typeof(Model))]
    public class Script : Model
    {
        [Link] Weather Met;
        [Link] Clock Clock;
    
        [Description("Start Date")]
        public DateTime StartDate { get; set; }
        
        [Description("End Date")]
        public DateTime EndDate { get; set; }
 
    
        [EventSubscribe("PreparingNewWeatherData")]
        private void OnPreparingNewWeatherData(object sender, EventArgs e)
        {
            if ((Clock.Today.Date >= StartDate) && (Clock.Today.Date <= EndDate))
                Met.Rain = 0;        
        }
    }
}
```
            Report DailyReport
            Report HarvestReport
            Manager Harvesting
```csharp
using Models.PMF.Phen;
using System;
using Models.Core;
using System.Collections.Generic;
using System.Text;
using Models.Soils;
using Models.PMF;
using Models;
using System.Xml.Serialization;
using APSIM.Shared.Utilities;

namespace Models
{
    [Serializable] 
    public class Script : Model
    {
        [Link] private Plant Wheat;
        [Link(Type = LinkType.Path, Path = "[Wheat].Phenology")]
        private Phenology phenology;
        [EventSubscribe("DoManagement")]
        private void OnDoManagement(object sender, EventArgs e)
        {
            if (phenology.CurrentPhase.Name == "GrainRipening")
            {
                Wheat.Harvest();
                Wheat.EndCrop();
            }
        }
    }
}
```
          SoilArbitrator Soil Arbitrator
      Experiment Lincoln1992
        Memo
          This trial has never been formally written up.  It was conducted at Plant and Foods A Block, Lincoln, New Zealand with 'Batten' Wheat grown on a Templeton silt loam (160mm AWC/m).  It was a 2 x 2 x 4 factorial with the following treatments:

          1. Sowing Date (5 May 1992 and 5 Aug 1992)
          2. Irrigation (Nil and 120 mm)
          3. Nitrogen (0, Low, Medium and High)

          The N applied to the Low, Medium and High N treatments was 100, 150 and 250 kg/ha, respectively, for the May sowing and 50, 100 and 150, respectively, for the August sowing.

          Could not find informaiton confirming sowing rate so assumed typical values of 300 plants per m/2  for the spring sowing 100 plants per m/2 for May sowing.
          Emergence was recorded as the 28th of May for the first planting.  The model was predicting this early so delayed sowing date to get emergence date correct..
        Factors
          Permutation
            Factor Sow
              CompositeFactor 5May
                Specifications:
                  [Operations]
                  [Fertilise].Script.SDSwitch = 1.0
                Operations
                  1992-05-15  [Wheat].Sow(population:100, cultivar:"BattenWinter", depth:40, rowSpacing:150);
              CompositeFactor 5Aug
                Specifications:
                  [Operations]
                  [Fertilise].Script.SDSwitch = 0.0
                Operations
                  1992-08-05  [Wheat].Sow(population:300, cultivar:"BattenWinter", depth:20, rowSpacing:150);
            Factor Irr: Specification=[IrrigationEvents]
              Operations Nil
              Operations Some
                1992-11-25  [Irrigation].Apply(60);
                1992-12-31  [Irrigation].Apply(60);
            Factor Nit
              CompositeFactor 0
                Specifications:
                  [Fertilise].Script.Amount1 = 0.0
                  [Fertilise].Script.Amount2 = 0.0
                  [Fertilise].Script.Amount3 = 0.0
                  [Fertilise].Script.Amount4 = 0.0
              CompositeFactor 1
                Specifications:
                  [Fertilise].Script.Amount1 = 50
                  [Fertilise].Script.Amount2 = 50
                  [Fertilise].Script.Amount3 = 0.0
                  [Fertilise].Script.Amount4 = 0.0
              CompositeFactor 2
                Specifications:
                  [Fertilise].Script.Amount1 = 50.0
                  [Fertilise].Script.Amount2 = 100.0
                  [Fertilise].Script.Amount3 = 0.0
                  [Fertilise].Script.Amount4 = 0.0
              CompositeFactor 3
                Specifications:
                  [Fertilise].Script.Amount1 = 50.0
                  [Fertilise].Script.Amount2 = 100.0
                  [Fertilise].Script.Amount3 = 50.0
                  [Fertilise].Script.Amount4 = 50.0
        Simulation SDtrialBase
          Clock: Start=1992-05-01; End=1993-05-01
          Summary summaryfile
          Weather: FileName=../../Tests/Validation/Wheat/met/lincoln.met
          Zone paddock: Area=1; Slope=0; AspectAngle=0; Altitude=50
            Folder Manager folder
              Operations
              Operations IrrigationEvents
              Manager Fertilise
                FertDate1 = 05-Aug
                FertDate2 = 01-Oct
                FertDate3 = 20-Oct
                FertDate4 = 25-Nov
                Amount1 = 0
                Amount2 = 0
                Amount3 = 0
                Amount4 = 0
                SDSwitch = 0
```csharp
using Models.Soils;
using System;
using Models.Core;
using Models.PMF;
using APSIM.Shared.Utilities;
namespace Models
{
    [Serializable]
    public class Script : Model
    {
        [Link] Clock Clock;
        [Link] Fertiliser Fertiliser;
        
        [Description("Date to fertilise")]
        public string FertDate1 { get; set; }
        [Description("Date to fertilise")]
        public string FertDate2 { get; set; }
        [Description("Date to fertilise")]
        public string FertDate3 { get; set; }
        [Description("Date to fertilise")]
        public string FertDate4 { get; set; }
        
        [Description("Amount of fertiliser to be applied (kg/ha)")]
        public double Amount1 { get; set; }
        [Description("Amount of fertiliser to be applied (kg/ha)")]
        public double Amount2 { get; set; }
        [Description("Amount of fertiliser to be applied (kg/ha)")]
        public double Amount3 { get; set; }
        [Description("Amount of fertiliser to be applied (kg/ha)")]
        public double Amount4 { get; set; }
        
        [Description("Amount of fertiliser to be applied (kg/ha)")]
        public double SDSwitch { get; set; }
        
        [EventSubscribe("DoManagement")]
        private void OnDoManagement(object sender, EventArgs e)
        {
            if (DateUtilities.WithinDates(FertDate1, Clock.Today, FertDate1))
                Fertiliser.Apply(amount: Amount1 * SDSwitch, type: "NO3N");
            if (DateUtilities.WithinDates(FertDate2, Clock.Today, FertDate2))
                Fertiliser.Apply(amount: Amount2, type: "NO3N");
            if (DateUtilities.WithinDates(FertDate3, Clock.Today, FertDate3))
                Fertiliser.Apply(amount: Amount3, type: "NO3N");
            if (DateUtilities.WithinDates(FertDate4, Clock.Today, FertDate4))
                Fertiliser.Apply(amount: Amount4 * SDSwitch, type: "NO3N");
        }
    }
}
```
            Irrigation
            Soil: SoilType=LincolnSoil; LocalName=Lincoln; Site=Lincoln; NearestTown=Unknown; Region=NZ; NaturalVegetation=Unknown; Latitude=0; Longitude=0
              Physical
                Thickness  ParticleSizeSand  ParticleSizeSilt  ParticleSizeClay  Rocks  BD   AirDry  LL15  DUL   SAT
                100        5                 65                30                0      1.3  0.08    0.12  0.31  0.44
                200        5                 65                30                0      1.3  0.12    0.12  0.3   0.44
                200        5                 65                30                0      1.3  0.1     0.1   0.28  0.44
                200        5                 65                30                0      1.3  0.09    0.09  0.31  0.44
                200        5                 65                30                0      1.3  0.11    0.11  0.3   0.44
                200        5                 65                30                0      1.3  0.16    0.16  0.28  0.44
                100        5                 65                30                0      1.3  0.15    0.15  0.3   0.44
                200        5                 65                30                0      1.3  0.12    0.12  0.34  0.44
                Rocks, ParticleSizeSand, ParticleSizeSilt, ParticleSizeClay source: Calculated
                SoilCrop WheatSoil: LL=[0.12, 0.12, 0.1, 0.09, 0.11, 0.16, 0.15, 0.12]; KL=[0.06, 0.06, 0.06, 0.04, 0.03, 0.02, 0.02, 0.02]; XF=[1, 1, 1, 1, 1, 1, 1, 1]
              WaterBalance SoilWater: SummerDate=1-Nov; SummerU=7; SummerCona=3; WinterDate=1-Apr; WinterU=7; WinterCona=3; DiffusConst=40; DiffusSlope=16; Salb=0.2; CN2Bare=75; CNRed=20; CNCov=0.8; DischargeWidth=0; CatchmentArea=0; PSIDul=-100
                Thickness  SWCON  KLAT
                100        0.6    0
                200        0.6    0
                200        0.6    0
                200        0.6    0
                200        0.6    0
                200        0.6    0
                200        0.6    0
                200        0.6    0
              Nutrient
              Organic: FOMCNRatio=30; CarbonUnits=Total
                Thickness  Carbon  SoilCNRatio  FBiom  FInert  FOM
                100        2.4     11.5         0.025  0.3     171.845
                200        2.1     11.5         0.025  0.4     115.191
                200        1.6     11.5         0.015  0.75    77.2148
                200        1.03    11.5         0.01   0.9     51.7586
                200        0.47    11.5         0.01   0.96    34.6949
                200        0.47    11.5         0.01   0.96    23.2567
                200        0.47    11.5         0.01   0.96    15.5894
                200        0.47    11.5         0.01   0.96    10.4499
              Chemical: PHUnits=Water
                Thickness  PH   CEC
                100        6.6  13.745
                200        6.2  13.07
                200        5.7  11.945
                200        5.5  10.6625
                200        5.5  9.4025
                200        5.5  9.4025
                200        5.5  9.4025
                200        5.5  9.4025
                CEC source: Calculated
              Water: Thickness=[100, 200, 200, 200, 200, 200, 100, 200]; InitialValues=[0.31, 0.3, 0.28, 0.31, 0.3, 0.28, 0.3, 0.34]; InitialPAWmm=256; RelativeTo=LL15; FilledFromTop=false
              Solute NO3: Thickness=[100, 200, 200, 200, 200, 200, 200, 200]; InitialValuesUnits=ppm; WaterTableConcentration=0; D0=0; DepthConstant=0; MaxDepthSoluteAccessible=0; RunoffEffectivenessAtMovingSolute=0; MaxEffectiveRunoff=0
                InitialValues=[19.2308, 4.23077, 4.23077, 3.84615, 3.46154, 1.53846, 1.15385, 0.769231]
              Solute NH4: Thickness=[100, 200, 200, 200, 200, 200, 200, 200]; InitialValues=[0.39, 0.6, 0.6, 0.5, 0.5, 0.5, 0.5, 0.5]; InitialValuesUnits=ppm; WaterTableConcentration=0; D0=0; DepthConstant=0; MaxDepthSoluteAccessible=0; RunoffEffectivenessAtMovingSolute=0; MaxEffectiveRunoff=0
              Solute Urea: same as Validation.New Zealand.Lincoln9192.LincolnBase.paddock.Soil.Urea
              SoilTemperature Temperature
            SurfaceOrganicMatter Surface Organic Matter: InitialResidueName=wheat_stubble; InitialResidueType=wheat; InitialResidueMass=0; InitialStandingFraction=0; InitialCPR=0; InitialCNR=80
            Fertiliser
            MicroClimate: a_interception=0; b_interception=1; c_interception=0; d_interception=0; SoilHeatFluxFraction=0; MinimumHeightDiffForNewLayer=0; NightInterceptionFraction=0; ReferenceHeight=2
            Plant Wheat
            Report DailyReport
            Report HarvestReport
            Manager Harvesting: same as Validation.New Zealand.Lincoln9192.LincolnBase.paddock.Harvesting
            Report SupReport: EventNames=[Clock].DoReport
              VariableNames:
                [Clock].Today
                [Leaf].CohortSize
                [Wheat].Arbitrator.DM.Allocated
                [Wheat].Arbitrator.DM.TotalPlantDemand
                [Wheat].Arbitrator.DM.NutrientLimitation
                [Wheat].Arbitrator.DM.SinkLimitation
                [Wheat].Arbitrator.DM.TotalFixationSupply
                [Wheat].Arbitrator.FN
                [Wheat].Arbitrator.N.TotalPlantDemand
                [Wheat].Leaf.CohortMaxSize
                [Wheat].Leaf.CohortParameters.GrowthDuration
                [Wheat].Leaf.CohortParameters.LagDuration
                [Wheat].Leaf.CohortParameters.MaxArea
                [Wheat].Leaf.CohortParameters.SenescenceDuration
                [Wheat].Leaf.CohortParameters.SpecificLeafAreaMax
                [Wheat].Leaf.CohortParameters.SpecificLeafAreaMin
                [Wheat].Leaf.NextExpandingLeafProportion
                [Wheat].Structure.MeanTillerGrowthRate
          SoilArbitrator Soil Arbitrator
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