Simulations: Version=16
  DataStore
  Simulation RUE
    Clock: StartDate=1995-06-13; EndDate=1995-10-30
    Summary summaryfile
    Weather: FileName=%root%\Tests\Validation\Wheat\APS26.met
    SoilArbitrator Soil Arbitrator
    Zone paddock: Area=1; Slope=0
      Irrigation
      Fertiliser
      Manager ApplyFertiliser
        FertDayOfYear = 186
        Amount = 160
```csharp
using System;
using Models.Core;
using Models.PMF;
using APSIM.Shared.Utilities;

namespace Models
{
	[Serializable]
	public class Script : Model
	{
		[Link] Clock Clock;
		[Link] Fertiliser Fertiliser;
		[Link] Summary Summary;
		
		[Description("Day of year fertiliser is to be applied")]
		public int FertDayOfYear { get; set; }

		[Description("Amount of fertiliser to be applied")]
		public double Amount { get; set; }

		[EventSubscribe("DoManagement")]
		private void OnDoManagement(object sender, EventArgs e)
		{
			if (Clock.Today.DayOfYear == FertDayOfYear)
			{
				Fertiliser.Apply(Amount: Amount, Type: Fertiliser.Types.NO3N);
			}
		
		}
		
	}
}
```
      Soil APS26Field: SoilType=APS26Soil; LocalName=APS26Site; Site=APS26Site; NearestTown=Unknown; Region=Lawes; NaturalVegetation=Unknown; Latitude=0; Longitude=0
        Water
          Thickness  BD    AirDry  LL15   DUL      SAT
          150        1.38  0.1     0.235  0.37277  0.44
          150        1.38  0.1     0.235  0.36     0.44
          300        1.38  0.1     0.22   0.35     0.44
          300        1.46  0.1     0.24   0.35     0.43
          300        1.51  0.1     0.23   0.36     0.42
          300        1.49  0.1     0.23   0.35     0.43
          300        1.47  0.1     0.19   0.33     0.43
          300        1.47  0.1     0.19   0.33     0.43
          300        1.47  0.1     0.19   0.33     0.43
          SoilCrop WheatSoil: LL=[0.24, 0.24, 0.22, 0.24, 0.23, 0.23, 0.18, 0.18, 0.18]; KL=[0.06, 0.045, 0.045, 0.04, 0.04, 0.06, 0.06, 0.06, 0.06]; XF=[1, 1, 1, 1, 1, 1, 1, 1, 1]
        SoilWater: SummerDate=1-Nov; SummerU=6; SummerCona=3.5; WinterDate=1-Apr; WinterU=6; WinterCona=3.5; DiffusConst=10; DiffusSlope=16; Salb=0.13; CN2Bare=78; CNRed=20; CNCov=0.8; slope=0; discharge_width=0; catchment_area=0; max_pond=0; residueinterception=0
          Thickness  SWCON  KLAT
          150        0.3    0
          150        0.3    0
          150        0.3    0
          150        0.3    0
          300        0.3    0
          300        0.3    0
          300        0.3    0
          300        0.3    0
          300        0.3    0
          300        0.3    0
        SoilNitrogen: fom_type=[default, manure, mucuna, lablab, shemp, stable]; fract_carb=[0.2, 0.3, 0.54, 0.57, 0.45, 0]; fract_cell=[0.7, 0.3, 0.37, 0.37, 0.47, 0.1]; fract_lign=[0.1, 0.4, 0.09, 0.06, 0.08, 0.9]
        SoilOrganicMatter: RootCN=40; RootWt=500; SoilCN=14.5; EnrACoeff=1; EnrBCoeff=1; OCUnits=Total
          Thickness  OC    FBiom  FInert
          150        2.2   0.024  0.45
          150        1.6   0.024  0.6
          150        1.35  0.01   0.7
          150        0.95  0.01   0.85
          300        1     0.01   0.9
          300        0.8   0.01   0.95
          300        0.45  0.01   0.95
          300        0.45  0.01   0.95
          300        0.45  0.01   0.95
          300        0.45  0.01   0.95
        Analysis: Thickness=[150, 150, 150, 150, 300, 300, 300, 300, 300, 300]; PH=[7.5, 8, 8, 8, 8, 8, 8, 8, 8, 8]; PHUnits=Water; BoronUnits=HotWater
        Sample Initial Water: Thickness=[150, 150, 150, 150, 300, 300, 300, 300, 300, 300]; NO3Units=ppm; NH4Units=ppm; SWUnits=Volumetric; OCUnits=Total; PHUnits=Water
          SW=[0.327449, 0.34295, 0.334038, 0.334038, 0.330344, 0.310632, 0.30604, 0.269447, 0.269, 0.269]
        Sample Initial Nitrogen: NO3Units=ppm; NH4Units=ppm; SWUnits=Volumetric; OCUnits=Total; PHUnits=Water
          Thickness  NO3  NH4
          150        1.5  0.5
          150        1.8  0.8
          150        1.5  0.5
          150        1.5  0.5
          300        0.4  0.42
          300        0.2  0.42
          300        0.4  0.37
          300        0.3  0.25
          300        0.3  0.3
          300        0.3  0.3
        CERESSoilTemperature
      SurfaceOrganicMatter: PoolName=wheat_stubble; type=Wheat; mass=0; standing_fraction=0; cpr=0; cnr=80; CriticalResidueWeight=2000; OptimumDecompTemp=20; MaxCumulativeEOS=20; CNRatioDecompCoeff=0.277; CNRatioDecompThreshold=25; TotalLeachRain=25; MinRainToLeach=10; CriticalMinimumOrganicC=0.004; DefaultCPRatio=0; DefaultStandingFraction=0; StandingExtinctCoeff=0.5; FractionFaecesAdded=0.5
        Pools:
          {PoolName=wheat_stubble, ResidueType=Wheat, Mass=0, CNRatio=80, CPRatio=0, StandingFraction=0}
        ResidueTypes: LoadFromResource=ResidueTypes
      Operations IrrigationSchedule
        1995-05-31  [Irrigation].Apply(amount:31);
        1995-06-01  [Irrigation].Apply(amount:13);
        1995-06-02  [Irrigation].Apply(amount:26);
        1995-06-05  [Irrigation].Apply(amount:26);
        1995-06-06  [Irrigation].Apply(amount:26);
        1995-06-07  [Irrigation].Apply(amount:26);
        1995-06-08  [Irrigation].Apply(amount:26);
        1995-06-15  [Wheat].Sow(population:120, cultivar:"Hartog", depth:40, rowSpacing:250);
        1995-07-05  [Irrigation].Apply(amount:26);
        1995-07-21  [Irrigation].Apply(amount:14);
        1995-08-01  [Irrigation].Apply(amount:28);
        1995-08-11  [Irrigation].Apply(amount:30);
        1995-08-25  [Irrigation].Apply(amount:15);
        1995-08-31  [Irrigation].Apply(amount:14);
        1995-09-04  [Irrigation].Apply(amount:15);
        1995-09-15  [Irrigation].Apply(amount:25);
        1995-09-22  [Irrigation].Apply(amount:20);
        1995-10-02  [Irrigation].Apply(amount:11);
      MicroClimate: a_interception=0; b_interception=1; c_interception=0; d_interception=0; soil_albedo=0.3; sun_angle=15; soil_heat_flux_fraction=0.4; night_interception_fraction=0.5; refheight=2; albedo=0.15; emissivity=0.96; RadIntTotal=0
      Manager Calculations
        NitTot = 27077.4
        CarbonTot = 0
```csharp
using System;
using Models.Core;
using Models.PMF;
using Models.PMF.OilPalm;
using Models.Soils;
using Models.SurfaceOM;
using APSIM.Shared.Utilities;

namespace Models
{
	[Serializable]
	[System.Xml.Serialization.XmlInclude(typeof(Model))]
	public class Script : Model
	{
		[Link] Clock Clock;
		[Link] Soil Soil;
		[Link] SurfaceOrganicMatter SurfaceOM;
		[Link] Summary Summary;
		
		public double NitTot { get; set; }
		public double CarbonTot { get; set; }
		
		[EventSubscribe("Commencing")]
		private void OnSimulationCommencing(object sender, EventArgs e)
		{	
			NitTot = 0;
			CarbonTot = 0;
		}
		
		
		[EventSubscribe("DoManagement")]
		private void OnDoManagement(object sender, EventArgs e)
		{
			NitTot = MathUtilities.Sum(Soil.SoilNitrogen.TotalN);
			CarbonTot = MathUtilities.Sum(Soil.SoilNitrogen.TotalC);
		}
	}
}
```
      Report SupReport: EventNames=[Clock].DoReport
        VariableNames:
          [Clock].Today
          [Leaf].ApexNum
          [Leaf].ApexGroupAge
          [Leaf].ApexGroupSize
      SoluteManager
      Plant Wheat: CropType=Wheat
        Memo TitlePage
          # The APSIM Wheat Model

          _Brown, H.E., Huth, N.I. and Holzworth, D.P._

          The APSIM wheat model has been developed using the Plant Modelling Framework (PMF) of [brown_plant_2014]. This new framework provides a library of plant organ and process submodels that can be coupled, at runtime, to construct a model in much the same way that models can be coupled to construct a simulation. This means that dynamic composition of lower level process and organ classes (e.g. photosynthesis, leaf) into larger constructions (e.g. maize, wheat, sorghum) can be achieved by the model developer without additional coding.

          The model consists of:

          * a phenology model to simulate development between growth phases
          * a structure model to simulate plant morphology
          * a collection of organs to simulate the various plant parts
          * an arbitrator to allocate resources (N, biomass) to the various plant organs
        OrganArbitrator Arbitrator
          RelativeAllocation NArbitrator
          RelativeAllocation DMArbitrator
        Phenology: DaysAfterSowing=0
          Memo
            Wheat exhibits a range of developmental responses to environment and these are strongly influences by genotype characteristics.
            Temperature effects development and it effects are captured by thermal time, incrasing development rates and decreasing phase durations as temperatures as temperatures increase.  However, wheat also exhibits vernalisation and photoperiod sensitivities in its Vegetative phase and further photoperiod sensitivity in the EarlyReproducivePhase.  Photoperiod responses are seen as a reduction in the length of a phase for a photoperiod sensitive genotype in response to a longer photoperiod.  Vernalisation responses are more complicated as they are driven by temperature but interact with photoperiod.  For vernalisation sensitive varieties (Winter types) exposure to cool temperatures or short photoperiods during the Vegetative phase will reduce the thermal time duration of the vegetative phase.

            This model draws on the Kirby Framework to capture these vernalisation and photoperiod responses.  This framework assumes that the timing of anthesis is a result of the timing of flag leaf and an additional thermal time passage from there to anthesis.  It also assumes the timing of flag leaf is a rusult of the Final Leaf Number which sets a target, and leaf appearance rate, which sets the rate of progress to this target.  Leaf appearance rate is a function of Thermal time and a genotype specific Phyllochron which changes with Haun stage as described by [Jamieson_LeafAppearance_1995].

            Final Leaf Number (FLN) is modeled as the sum of three numbers:

            FLN = MinLeafNumber + VernalLeaves + PhotoLeaves

            Where MinLeafNumber is the number of leaves that a wheat crop will produce when vernalisation is satisified early in the crops duration (before 2nd true leaf) and it is grown in a long photoperiod..  VernalLeaves are the number of leaves that are added due to vernalisation effects.  For insensitive varieties this will always be zero but this is potentially a larger number for sensitivie varieties and the number progresively decreases as the crop encounters more vernalisation.  PhotoLeaves are the number of leaves that are added to the minimum leaf number as a result of short day exposure.  For insensitive varieties this will be zero but is potential larger for more sensitivie varieties and decreases as day length increases.  More detailed explinations of the components of phenology are provided below.
          DivideFunction MeanTemp
            AddFunction
              VariableReference MaxT: VariableName=[Weather].MaxT
              VariableReference MinT: VariableName=[Weather].MinT
            Constant Two: FixedValue=2
          AirTemperatureFunction ThermalTime
            XYPairs: X=[0, 26, 37]; Y=[0, 26, 0]
            Memo
              Thermal time determines the rate of developmental progress through many of the crops phases and is used by organs to determing potential growth rates.
          MultiplyFunction DailyVernalisation
            Memo
              Vernalisation responses are based on those described by [Brown_Anthesis_2013].   Vernalisation is assumed to be related to the expression of the Vrn1 Gene.  Its experssion is accumulated daily and daily upregulation as a function of development (DeltaHaunStage) and a TempResponseProfile that declines exponentially from a maximum at 1<sup>o</sup>C to zero at 0<sup>o</sup>C and at 18<sup>o</sup>C.
            VariableReference DeltaHaunStage: VariableName=[Structure].DeltaHaunStage
            AirTemperatureFunction TempResponseProfile
              XYPairs
                X=[0, 1, 2, 3, 4, 5, 6, 7, 8, 9, 10, 11, 12, 13, 14, 15, 16, 17, 18, 19, 20, 30, 32]
                Y=[0, 1.205, 1.037, 0.893, 0.768, 0.661, 0.569, 0.49, 0.422, 0.363, 0.312, 0.269, 0.231, 0.199, 0.171, 0.148, 0.127, 0.109, 0.094, 0.081, 0, 0, -0.5]
          PhotoperiodFunction Photoperiod: Twilight=-6; DayLength=0
          PhaseLookup PercievedPhotoPeriod
            PhaseLookupValue ApexBelowGround: Start=Germination; End=Emergence
              Constant Photoperiod: FixedValue=0; Units=h
            PhaseLookupValue ApexAboveGround: Start=Emergence; End=HarvestRipe
              VariableReference Photoperiod: VariableName=[Phenology].Photoperiod.Value()
          MinimumFunction Vrn1
            Memo
              Vrn1 accumulation begins when Vrn4 experssion is down regulated to zero and stops, assuming vernalisation saturation, at a value of 1
            Constant Saturation: FixedValue=1; Units=Relative Experssion
            AccumulateFunction CurrentExpression: StartStageName=Germination; EndStageName=TerminalSpikelet; FractionRemovedOnCut=0; FractionRemovedOnHarvest=0; FractionRemovedOnGraze=0; FractionRemovedOnPrune=0
              LessThanFunction Vernalisation
                VariableReference If_Vrn4: VariableName=[Phenology].Vrn4.Value()
                VariableReference IsLessThanLag: VariableName=[Phenology].VernLag.Value()
                Constant Return_Zero: FixedValue=0
                VariableReference elseReturn_Vernalisation: VariableName=[Phenology].DailyVernalisation.Value()
          MinimumFunction Vrn4
            VariableReference MaxExpression: VariableName=[Phenology].VernLag.Value()
            AccumulateFunction CurrentExpression: StartStageName=Germination; EndStageName=TerminalSpikelet; FractionRemovedOnCut=0; FractionRemovedOnHarvest=0; FractionRemovedOnGraze=0; FractionRemovedOnPrune=0
              VariableReference VernalisationConditioning: VariableName=[Phenology].DailyVernalisation.Value()
          Constant MinimumLeafNumber: FixedValue=7; Units=Leaves
            Memo
              Number of leaves the plant will produce when fully vernalised early and grown in long photoperiod
          Constant VrnSensitivity: FixedValue=0; Units=Leaves
            Memo
              The difference between Inherent earlyness leaf number and the number of leaves produced when the plant is unvernalised and grown in long photoperiod
          Constant VernLag: FixedValue=1; Units=Unitless
            Memo
              The amount of vernalising temperature required before vernalisation response will be evident.  Value of relative to the amount offl vernalisation temperature required from the end of the lag until vernalisation saturation.  A value of 0 means there is no lag, a value of 1 means the lag is the same (in vernal time) as the vernalisation requirement and a value of 2 means the lag is twice as long as the vernalisation response phase
          Constant PpSensitivity: FixedValue=3; Units=Leaves
            Memo
              The reduction in leaf number going from 8 to 16 h Pp
          Constant EarlyReproductivePpSensitivity: FixedValue=0
            Memo
              The phyllochrons duration for the plant to go from flag leaf ligual appearance at 16 h Pp compared to the phyllochron duration for the same phase at 8 h Pp.
          Constant EarlyReproductiveLongDayBase: FixedValue=2.5
            Memo
              The phyllochrons duration for the plant to go from flag leaf ligual appearance at 16 h Pp.
          GerminatingPhase Germinating: Start=Sowing; End=Germination
          EmergingPhase Emerging: Start=Germination; End=Emergence; ShootLag=40; ShootRate=1.5
            VariableReference ThermalTime: VariableName=[Phenology].ThermalTime.Value()
          GenericPhase Vegetative: Start=Emergence; End=TerminalSpikelet
            Memo
              The duration of the vegetative phase is set by a target Haun Stage for the occurance of Terminal Spikelet and the rate of leaf appearance.
            VariableReference ThermalTime: VariableName=[Phenology].ThermalTime.Value()
            MultiplyFunction Target
              VariableReference Phyllochron: VariableName=[Structure].MeanPhyllochron.Value()
              VariableReference HSTS: VariableName=[Structure].HaunStageTerminalSpikelet.Value()
            Memo Memo1
              HSTS decreases as vernalisation is accumulated and as photoperiod extends, capturing the effect of these responses on the duration of the Vegetative phase
          LeafAppearancePhase StemElongation: Start=TerminalSpikelet; End=FlagLeaf
            Memo
              The Final leaf number is fixed at Terminal Spikelet and leaves contune to appear at a rate set by thermal time and phyllochron until flag leaf liguale appears and this phase is completed.
            VariableReference ThermalTime: VariableName=[Phenology].ThermalTime.Value()
          GenericPhase EarlyReproductive: Start=FlagLeaf; End=Flowering
            VariableReference ThermalTime: VariableName=[Phenology].ThermalTime.Value()
            MultiplyFunction Target
              VariableReference Phyllochron: VariableName=[Structure].Phyllochron.BasePhyllochron.Value()
              AddFunction Phyllochrons
                VariableReference LongDayBase: VariableName=[Phenology].EarlyReproductiveLongDayBase.Value()
                MultiplyFunction IncreaseDueToShortPhotoPeriod
                  LinearInterpolationFunction PhotoPeriodResponse: XProperty=[Phenology].Photoperiod.Value()
                    XYPairs: X=[11, 16]; Y=[1, 0]
                  VariableReference PpSensitivity: VariableName=[Phenology].EarlyReproductivePpSensitivity.Value()
          GenericPhase GrainDevelopment: Start=Flowering; End=StartGrainFill
            Constant Target: FixedValue=120
            VariableReference ThermalTime: VariableName=[Phenology].ThermalTime.Value()
          GenericPhase GrainFilling: Start=StartGrainFill; End=EndGrainFill
            Constant Target: FixedValue=545
            VariableReference ThermalTime: VariableName=[Phenology].ThermalTime.Value()
          GenericPhase Maturing: Start=EndGrainFill; End=Maturity
            Constant Target: FixedValue=35
            VariableReference ThermalTime: VariableName=[Phenology].ThermalTime.Value()
          GenericPhase Ripening: Start=Maturity; End=HarvestRipe
            Constant Target: FixedValue=300
            VariableReference ThermalTime: VariableName=[Phenology].ThermalTime.Value()
          EndPhase ReadyForHarvesting: Start=HarvestRipe; End=Unused
            VariableReference ThermalTime: VariableName=[Phenology].ThermalTime.Value()
          ZadokPMF Zadok
          OnEventFunction FlagLeafDAS: SetEvent=FlagLeaf; ReSetEvent=never
            Memo
              A function is used to provide flowering date as days after sowing(DAS).
            Constant PreEventValue: FixedValue=0
            VariableReference PostEventValue: VariableName=[Phenology].DaysAfterSowing
          OnEventFunction FloweringDAS: SetEvent=Flowering; ReSetEvent=never
            Memo
              A function is used to provide flowering date as days after sowing(DAS).
            Constant PreEventValue: FixedValue=0
            VariableReference PostEventValue: VariableName=[Phenology].DaysAfterSowing
          OnEventFunction MaturityDAS: SetEvent=Maturity; ReSetEvent=never
            Memo
              A function is used to provide maturity date as days after sowing(DAS).
            Constant PreEventValue: FixedValue=0
            VariableReference PostEventValue: VariableName=[Phenology].DaysAfterSowing
        Structure: Initialised=false; Germinated=false; Emerged=false; CohortToInitialise=0; TipToAppear=0; ApexNum=0
          Constant StemSenescenceAge: FixedValue=0
          VariableReference ThermalTime: VariableName=[Phenology].ThermalTime.Value()
          MultiplyFunction Phyllochron
            Memo Rational
              Based on [Jamieson_SIRIUS_1998] where leaf appearace could be described by a base phyllochron determined between leaves 2 and 7 and a phyllochron that was 70% of base phyllochron for leaves < 2 and 130% of base phyllochron for leaves > 7
            LinearInterpolationFunction LeafStageFactor: XProperty=[Leaf].AppearedCohortNo
              XYPairs: X=[0, 2, 3, 7, 8, 11, 12]; Y=[0.75, 0.75, 1, 1, 1.4, 1.4, 1.4]
            Constant BasePhyllochron: FixedValue=120; Units=oC.d
            LinearInterpolationFunction PhotoPeriodEffect: XProperty=[Phenology].Photoperiod.Value()
              XYPairs: X=[8, 12, 14]; Y=[1.6, 1, 1]
          MultiplyFunction BranchingRate
            Memo
              Potential branching rate is determined by the commonly observed pattern of tillering in wheat, in which each tiller emerges with the third leaf on its parent axis (e.g. first tiller emerges at the same time as the third leaf on the main stem, the first secondary tiller appears with the third leaf on tiller 1).  This is described as a simple function of main stem leaf number.
            PhaseLookup PotentialBranchingRate
              PhaseLookupValue Vegetative: Start=Emergence; End=TerminalSpikelet
                LinearInterpolationFunction PotentialBranchingRate: XProperty=[Structure].LeafTipsAppeared
                  XYPairs: X=[1, 2, 3, 4, 5, 6, 7, 8]; Y=[0, 0, 1, 2, 4, 7, 12, 20]
              PhaseLookupValue Reproductive: Start=TerminalSpikelet; End=HarvestRipe
                Constant Zero: FixedValue=0
            MinimumFunction StressFactors
              LinearInterpolationFunction NitrogenEffect: XProperty=[Arbitrator].FN
                Memo
                  Inadequate Nitrogen supply is assumed to affect tillering prior to any effect on photosynthesis or leaf size.
                XYPairs: X=[0.5, 2, 3]; Y=[0, 1, 1]
              LinearInterpolationFunction CoverEffect: XProperty=[Leaf].CoverTotal
                Memo
                  Tillering is said to cease once a threshold fraction of incoming radiation has been achieved.  This captures shading effects on tillering described by [evers2006cessation].
                XYPairs: X=[0, 0.1, 0.25]; Y=[1, 1, 0]
              LinearInterpolationFunction WaterStressEffect: XProperty=[Root].WaterTensionFactor
                XYPairs: X=[0, 1]; Y=[0, 1]
          PhaseLookup BranchMortality
            PhaseLookupValue MortalityPhase: Start=FlagLeaf; End=Flowering
              MultiplyFunction Mortality
                LinearInterpolationFunction MortalityPerDegDay: XProperty=[Structure].MeanTillerGrowthRate.Value()
                  XYPairs: X=[0, 0.005]; Y=[0.002, 0]
                VariableReference ThermalTime: VariableName=[Phenology].ThermalTime.Value()
          HeightFunction HeightModel
            LinearInterpolationFunction PotentialHeight: XProperty=[Phenology].Stage
              XYPairs: X=[3, 4, 5, 6, 7]; Y=[10, 200, 1000, 1100, 1200]
            LinearInterpolationFunction WaterStress: XProperty=[Wheat].WaterSupplyDemandRatio
              XYPairs: X=[0.3, 1]; Y=[0, 1]
          MovingAverageFunction MeanTillerGrowthRate: NumberOfDays=5; InitialValue=0
            DivideFunction TillerGrowthRate
              VariableReference DailyGrowth: VariableName=[Arbitrator].DM.TotalFixationSupply
              VariableReference ThermalTime: VariableName=[Phenology].ThermalTime.Value()
              VariableReference StemPopulation: VariableName=[Structure].TotalStemPopn
          MovingAverageFunction MeanPhyllochron: NumberOfDays=300; InitialValue=80
            VariableReference Phyllochron: VariableName=[Structure].Phyllochron.Value()
          HoldFunction FinalLeafNumber: WhenToHold=TerminalSpikelet
            AddFunction FinalNodeNumber
              VariableReference MinLeafNumber: VariableName=[Phenology].MinimumLeafNumber.Value()
              MultiplyFunction VernalLeaves
                VariableReference UnVernalisedLeaves: VariableName=[Phenology].VrnSensitivity.Value()
                SubtractFunction VernalisationReductionFactor
                  Constant One: FixedValue=1
                  VariableReference RelativeVrn1Expression: VariableName=[Phenology].Vrn1.Value()
              MultiplyFunction PhotoPLeaves
                VariableReference ShortPpLeaves: VariableName=[Phenology].PpSensitivity.Value()
                LinearInterpolationFunction PhotoPeriodReductionFactor: XProperty=[Phenology].Photoperiod.Value()
                  XYPairs: X=[10, 16]; Y=[1, 0]
          ExpressionFunction HaunStageTerminalSpikelet: Expression=([Structure].FinalLeafNumber.Value() - 2.85)/1.1
            Memo
              The Haun stage at which Terminal Spikelet occurs is determined from final leaf number using the approach described in [Brown_Anthesis_2013].
          AddFunction HaunStage
            VariableReference AppearedLeaves: VariableName=[Leaf].ExpandedCohortNo
            VariableReference ProportionOfExpandingLeaf: VariableName=[Leaf].NextExpandingLeafProportion
        ReproductiveOrgan Grain: GrowthRespiration=0; MaintenanceRespiration=0; RipeStage=Ripe
          Biomass Live
          Biomass Dead
          Constant MaxNConcDailyGrowth: FixedValue=0.03
          Constant WaterContent: FixedValue=0.12
          Constant MinimumNConc: FixedValue=0.0123
          Constant MaximumNConc: FixedValue=0.03
          Constant MaximumPotentialGrainSize: FixedValue=0.043; Units=g
          AccumulateFunction AccumThermalTime: StartStageName=Flowering; EndStageName=Maturity; FractionRemovedOnCut=0; FractionRemovedOnHarvest=0; FractionRemovedOnGraze=0; FractionRemovedOnPrune=0
            VariableReference DailyThermalTimeValue: VariableName=[Phenology].ThermalTime.Value()
          PhaseLookup DMDemandFunction
            PhaseLookupValue InitialPhase: Start=Flowering; End=StartGrainFill
              FillingRateFunction
                VariableReference NumberFunction: VariableName=[Grain].NumberFunction.Value()
                VariableReference FillingDuration: VariableName=[Phenology].GrainDevelopment.Target.Value()
                VariableReference ThermalTime: VariableName=[Phenology].ThermalTime.Value()
                MultiplyFunction PotentialSizeIncrement
                  VariableReference InitialProportion: VariableName=[Grain].InitialGrainProportion.Value()
                  VariableReference MaximumSize: VariableName=[Grain].MaximumPotentialGrainSize.Value()
            PhaseLookupValue LinearPhase: Start=StartGrainFill; End=EndGrainFill
              FillingRateFunction
                VariableReference NumberFunction: VariableName=[Grain].NumberFunction.Value()
                VariableReference FillingDuration: VariableName=[Phenology].GrainFilling.Target.Value()
                VariableReference ThermalTime: VariableName=[Phenology].ThermalTime.Value()
                MultiplyFunction PotentialSizeIncrement
                  SubtractFunction ProportionLinearPhase
                    Constant One: FixedValue=1
                    VariableReference InitialProportion: VariableName=[Grain].InitialGrainProportion.Value()
                  VariableReference MaximumSize: VariableName=[Grain].MaximumPotentialGrainSize.Value()
          ExpressionFunction Protein
            Expression=([Grain].Live.N + [Grain].Dead.N)/([Grain].Live.Wt + [Grain].Dead.Wt) * 100 * 5.71
          Constant InitialGrainProportion: FixedValue=0.05
          PhaseLookup NFillingRate
            PhaseLookupValue GrainFilling: Start=Flowering; End=EndGrainFill
              FillingRateFunction
                VariableReference NumberFunction: VariableName=[Grain].NumberFunction.Value()
                AddFunction FillingDuration
                  VariableReference FloweringToGrainFilling: VariableName=[Phenology].GrainDevelopment.Target.Value()
                  VariableReference GrainFilling: VariableName=[Phenology].GrainFilling.Target.Value()
                VariableReference ThermalTime: VariableName=[Phenology].ThermalTime.Value()
                MultiplyFunction PotentialSizeIncrement
                  VariableReference MaximumSize: VariableName=[Grain].MaximumPotentialGrainSize.Value()
                  VariableReference MaximumNConc: VariableName=[Grain].MaximumNConc.Value()
          BiomassRemoval BiomassRemovalDefaults
            OrganBiomassRemovalType Harvest: FractionLiveToRemove=1; FractionDeadToRemove=0; FractionLiveToResidue=0; FractionDeadToResidue=0
            OrganBiomassRemovalType Cut: FractionLiveToRemove=1; FractionDeadToRemove=0; FractionLiveToResidue=0; FractionDeadToResidue=0
            OrganBiomassRemovalType Prune: FractionLiveToRemove=0; FractionDeadToRemove=0; FractionLiveToResidue=0.8; FractionDeadToResidue=0
            OrganBiomassRemovalType Graze: FractionLiveToRemove=0.6; FractionDeadToRemove=0; FractionLiveToResidue=0.2; FractionDeadToResidue=0
            OrganBiomassRemovalType Thin: FractionLiveToRemove=0; FractionDeadToRemove=0; FractionLiveToResidue=0.05; FractionDeadToResidue=0
          HoldFunction NumberFunction: WhenToHold=Flowering
            MultiplyFunction GrainNumber
              Constant GrainsPerGramOfStem: FixedValue=22; Units=grains
              VariableReference StemMass: VariableName=[StemPlusSpike].Wt
        Root: GrowthRespiration=0; MaintenanceRespiration=0
          CompositeBiomass Live: Propertys=[[Root].LayerLive]
          CompositeBiomass Dead: Propertys=[[Root].LayerDead]
          Constant KLModifier: FixedValue=1
          Constant SoilWaterEffect: FixedValue=1
          Constant MaxDailyNUptake: FixedValue=20
          Constant SenescenceRate: FixedValue=0.005
          Constant StructuralFraction: FixedValue=1
          Constant MaximumRootDepth: FixedValue=1000000
          Constant MaximumNConc: FixedValue=0.01
          Constant MinimumNConc: FixedValue=0.01
          PhaseBasedSwitch NitrogenDemandSwitch: Start=Germination; End=Maturity
          BiomassRemoval BiomassRemovalDefaults
            OrganBiomassRemovalType Harvest: FractionLiveToRemove=0; FractionDeadToRemove=0; FractionLiveToResidue=0.2; FractionDeadToResidue=0
            OrganBiomassRemovalType Cut: FractionLiveToRemove=0; FractionDeadToRemove=0; FractionLiveToResidue=0.3; FractionDeadToResidue=0
            OrganBiomassRemovalType Prune: FractionLiveToRemove=0; FractionDeadToRemove=0; FractionLiveToResidue=0.1; FractionDeadToResidue=0
            OrganBiomassRemovalType Graze: FractionLiveToRemove=0; FractionDeadToRemove=0; FractionLiveToResidue=0.15; FractionDeadToResidue=0
            OrganBiomassRemovalType Thin: FractionLiveToRemove=0; FractionDeadToRemove=0; FractionLiveToResidue=0.05; FractionDeadToResidue=0
          LinearInterpolationFunction KNO3: XProperty=[Root].LengthDensity
            XYPairs: X=[0, 0.004]; Y=[0.02, 0.02]
          LinearInterpolationFunction KNH4: XProperty=[Root].LengthDensity
            XYPairs: X=[0, 0.004]; Y=[0.01, 0.01]
          Constant InitialDM: FixedValue=0.005; Units=g/plant
          Constant SpecificRootLength: FixedValue=105; Units=m/g
          MultiplyFunction RootFrontVelocity
            PhaseLookup PotentialRootFrontVelocity
              PhaseLookupValue PreEmergence: Start=Germination; End=Emergence
                Constant Value: FixedValue=5
              PhaseLookupValue PostEmergence: Start=Emergence; End=Maturity
                Constant Value: FixedValue=20
            WeightedTemperatureFunction TemperatureFactor: MaximumTemperatureWeighting=0.5
              XYPairs: X=[0, 15, 25, 35]; Y=[0, 1, 1, 0]
            LinearInterpolationFunction WaterFactor: XProperty=[SoilWaterScale]
              SoilWaterScale
              XYPairs: X=[0, 0.25, 1]; Y=[0, 1, 1]
          LinearInterpolationFunction NUptakeSWFactor: XProperty=[SoilWaterScale]
            SoilWaterScale
            XYPairs: X=[0, 1]; Y=[0, 1]
            Memo
              This is modelled in the same way as the old wheat model
          PartitionFractionDemandFunction DMDemandFunction
            PhaseLookup PartitionFraction
              PhaseLookupValue PreEmergence: Start=Germination; End=Emergence
                Constant Value: FixedValue=0
              PhaseLookupValue PreFlowering: Start=Emergence; End=Flowering
                LinearInterpolationFunction AgeFactor: XProperty=[Phenology].Stage
                  XYPairs: X=[3, 4]; Y=[0.5, 0.2]
              PhaseLookupValue PostFlowering: Start=Flowering; End=EndGrainFill
                Constant Value: FixedValue=0.2
        Leaf: MaxCover=1; Albedo=0.25; Gsmax=0.011; R50=150; MicroClimatePresent=true; KDead=0.3; MaximumMainStemLeafNumber=30
          zero: GrowthRespiration, MaintenanceRespiration, CurrentExpandingLeaf, StartFractionExpanded, FractionNextleafExpanded, DeadNodesYesterday, FRGR, PotentialEP, DMConversionEfficiency, TipsAtEmergence, CohortsAtInitialisation, FractionDied
          ApexTiller
          LeafCohort InitialLeaves[1]: Rank=1; Area=200
            zero: NReallocationFactor, DMReallocationFactor, NRetranslocationFactor, DMRetranslocationFactor, ShadeInducedSenRate, SenescedFrac, DeltaPotentialArea, DeltaStressConstrainedArea, DeltaCarbonConstrainedArea, PotentialStructuralDMAllocation, PotentialMetabolicDMAllocation, MetabolicNReallocated, MetabolicWtReallocated, StorageNReallocated, StorageWtReallocated, MetabolicNRetranslocated, StorageNRetrasnlocated, DMRetranslocated, MetabolicNAllocation, StructuralDMAllocation, MetabolicDMAllocation, MaintenanceRespiration
          LeafCohort InitialLeaves[2]: Rank=2
            zero: NReallocationFactor, DMReallocationFactor, NRetranslocationFactor, DMRetranslocationFactor, ShadeInducedSenRate, SenescedFrac, DeltaPotentialArea, DeltaStressConstrainedArea, DeltaCarbonConstrainedArea, PotentialStructuralDMAllocation, PotentialMetabolicDMAllocation, MetabolicNReallocated, MetabolicWtReallocated, StorageNReallocated, StorageWtReallocated, MetabolicNRetranslocated, StorageNRetrasnlocated, DMRetranslocated, MetabolicNAllocation, StructuralDMAllocation, MetabolicDMAllocation, Area, MaintenanceRespiration
          CompositeBiomass Live: Propertys=[[Leaf].CohortLive]
          CompositeBiomass Dead: Propertys=[[Leaf].CohortDead]
          ArrayBiomass CohortArrayLive: Propertys=[[Leaf].Live]; ArraySize=[Leaf].MaxNodeNo
          ArrayBiomass CohortArrayDead: Propertys=[[Leaf].Dead]; ArraySize=[Leaf].MaxNodeNo
          LeafCohortParameters CohortParameters
            Constant NReallocationFactor: FixedValue=1
            Constant MaintenanceRespirationFunction: FixedValue=0
            Constant NRetranslocationFactor: FixedValue=0.03
            Constant DMReallocationFactor: FixedValue=0
            Constant DMRetranslocationFactor: FixedValue=0
            MinimumFunction CellDivisionStress
              LinearInterpolationFunction WaterStressFactor: XProperty=[Wheat].WaterSupplyDemandRatio
                XYPairs: X=[0.5, 1]; Y=[0.1, 1]
              LinearInterpolationFunction NitrogenStressFactor: XProperty=[Wheat].Leaf.Fn
                XYPairs: X=[0, 0.5, 1]; Y=[0.1, 0.1, 1]
            MinimumFunction ExpansionStress
              LinearInterpolationFunction WaterStress: XProperty=[Root].WaterTensionFactor
                XYPairs: X=[0.1, 1, 1.3]; Y=[0, 1, 1]
              LinearInterpolationFunction TemperatureEffect: XProperty=[Phenology].MeanTemp.Value()
                XYPairs: X=[0, 12, 14]; Y=[0, 1, 1]
              LinearInterpolationFunction NitrogenStressFactor: XProperty=[Wheat].Leaf.Fn
                XYPairs: X=[0, 0.5, 1]; Y=[0.1, 0.1, 1]
            MultiplyFunction MaxArea
              Constant AreaLargestLeaves: FixedValue=2600; Units=mm^2
              LinearInterpolationFunction AgeFactor: XProperty=[Phenology].Stage
                XYPairs: X=[3, 3.45, 4]; Y=[0.1, 0.5, 1]
            MultiplyFunction GrowthDuration
              Constant Multiplier: FixedValue=1.3
              VariableReference Phyllochron: VariableName=[Structure].Phyllochron.Value()
            MultiplyFunction LagDuration
              LinearInterpolationFunction AgeFactor: XProperty=[Phenology].Stage
                XYPairs: X=[3, 4]; Y=[0.4, 1]
              SubtractFunction LastLeafDuration
                AddFunction ThermalTimeToRipe
                  VariableReference EarlyReproductive: VariableName=[Phenology].EarlyReproductive.Target.Value()
                  VariableReference GrainDevelopment: VariableName=[Phenology].GrainDevelopment.Target.Value()
                  VariableReference GrainFilling: VariableName=[Phenology].GrainFilling.Target.Value()
                  VariableReference Maturing: VariableName=[Phenology].Maturing.Target.Value()
                  VariableReference Ripening: VariableName=[Phenology].Ripening.Target.Value()
                VariableReference SenescenceDuration: VariableName=[Leaf].CohortParameters.SenescenceDuration.Value()
            MultiplyFunction SenescenceDuration
              Constant Multiplier: FixedValue=3
              VariableReference Phyllochron: VariableName=[Structure].Phyllochron.Value()
            Constant DetachmentLagDuration: FixedValue=1000000
            Constant DetachmentDuration: FixedValue=1000000
            Constant RelativeBranchLeafSize: FixedValue=1
            LinearInterpolationFunction MaximumNConc: XProperty=[Phenology].Stage
              XYPairs: X=[3, 4, 6]; Y=[0.08, 0.05, 0.02]
            MultiplyFunction CriticalNConc
              LinearInterpolationFunction CriticalNConcAt350ppm: XProperty=[Phenology].Stage
                XYPairs: X=[3, 4, 6]; Y=[0.07, 0.04, 0.015]
              LinearInterpolationFunction CO2Factor: XProperty=[Weather].CO2
                XYPairs: X=[350, 700]; Y=[1, 0.93]
            LinearInterpolationFunction MinimumNConc: XProperty=[Phenology].Stage
              XYPairs: X=[3, 4, 6]; Y=[0.01, 0.005, 0.005]
            AddFunction DroughtInducedLagAcceleration
              Constant One: FixedValue=1
              MultiplyFunction Stress
                Constant StressResponseCoefficient: FixedValue=1
                LinearInterpolationFunction StressFactor: XProperty=[Wheat].WaterSupplyDemandRatio
                  XYPairs: X=[0, 0.5]; Y=[0.5, 0]
            AddFunction DroughtInducedSenAcceleration: same as RUE.paddock.Wheat.Leaf.CohortParameters.DroughtInducedLagAcceleration
            LinearInterpolationFunction SpecificLeafAreaMax: XProperty=[Phenology].Stage
              XYPairs: X=[3, 4]; Y=[18000, 30000]
            LinearInterpolationFunction SpecificLeafAreaMin: XProperty=[Leaf].Fn
              XYPairs: X=[0.4, 1]; Y=[10000, 18000]
            Constant InitialNConc: FixedValue=0
            Constant StructuralFraction: FixedValue=0.5
            Constant StorageFraction: FixedValue=0
            Constant LeafSizeShapeParameter: FixedValue=0.3
            Constant SenessingLeafRelativeSize: FixedValue=1; Units=0-1
            MultiplyFunction ShadeInducedSenescenceRate
              Constant RatePerDegDay: FixedValue=0
                Memo
                  1% per degree day means it takes one phyllochron for a shaded leaf to fully sceness
              VariableReference ThermalTime: VariableName=[Phenology].ThermalTime.Value()
            ArrayFunction LagDurationAgeMultiplier: Values=1 1 1
            ArrayFunction SenescenceDurationAgeMultiplier: Values=1 1 1
            ArrayFunction LeafSizeAgeMultiplier: Values=1 1 1 1 1 1 1 1 1 1 1 1
          RUEModel Photosynthesis
            Constant RUE: FixedValue=1.5
            WeightedTemperatureFunction FT: MaximumTemperatureWeighting=0.75
              XYPairs: X=[0, 15, 25, 35]; Y=[0, 1, 1, 0]
            LinearInterpolationFunction FN: XProperty=[Leaf].Fn
              XYPairs: X=[0, 1, 1.5]; Y=[0, 1, 1]
            LinearInterpolationFunction FW: XProperty=[Leaf].Fw
              XYPairs: X=[0, 1, 1]; Y=[0, 1, 1]
            LinearInterpolationFunction FVPD: XProperty=[Photosynthesis].VPD
              XYPairs: X=[0, 10, 40]; Y=[1, 1, 0]
            RUECO2Function FCO2: PhotosyntheticPathway=C3
            VariableReference RadnInt: VariableName=[Leaf].RadIntTot
          Constant FrostFraction: FixedValue=0
          VariableReference ThermalTime: VariableName=[Phenology].ThermalTime.Value()
          MinimumFunction FRGRFunction
            VariableReference RUE_FT: VariableName=[Leaf].Photosynthesis.FT.Value()
            MinimumFunction Others
              VariableReference RUE_FN: VariableName=[Leaf].Photosynthesis.FN.Value()
              VariableReference RUE_FVPD: VariableName=[Leaf].Photosynthesis.FVPD.Value()
          BiomassRemoval BiomassRemovalDefaults
            OrganBiomassRemovalType Harvest: FractionLiveToRemove=0; FractionDeadToRemove=0; FractionLiveToResidue=0.3; FractionDeadToResidue=0.3
            OrganBiomassRemovalType Cut: FractionLiveToRemove=0.8; FractionDeadToRemove=0.8; FractionLiveToResidue=0; FractionDeadToResidue=0
            OrganBiomassRemovalType Prune: FractionLiveToRemove=0; FractionDeadToRemove=0; FractionLiveToResidue=0.6; FractionDeadToResidue=0.6
            OrganBiomassRemovalType Graze: FractionLiveToRemove=0.6; FractionDeadToRemove=0.6; FractionLiveToResidue=0.1; FractionDeadToResidue=0.1
            OrganBiomassRemovalType Thin: FractionLiveToRemove=0; FractionDeadToRemove=0; FractionLiveToResidue=0.05; FractionDeadToResidue=0.05
          Constant ExtinctionCoeff: FixedValue=0.5
          Constant StructuralFraction: FixedValue=0.5
          Constant DMConversionEfficiencyFunction: FixedValue=1
          ApexStandard
        GenericOrgan Spike
          PopulationBasedDemandFunction DMDemandFunction
            VariableReference ThermalTime: VariableName=[Phenology].ThermalTime.Value()
            Constant ExpansionStress: FixedValue=1
            VariableReference OrganPopulation: VariableName=[Spike].HeadNumber.Value()
            Constant StartStage: FixedValue=5
            Constant MaximumOrganWt: FixedValue=0.5
            AddFunction GrowthDuration
              VariableReference EarlyReproductive: VariableName=[Phenology].EarlyReproductive.Target.Value()
              VariableReference GrainDevelopment: VariableName=[Phenology].GrainDevelopment.Target.Value()
          Biomass Live
          Biomass Dead
          Constant NReallocationFactor: FixedValue=0
          Constant NRetranslocationFactor: FixedValue=0.1
          Constant MaximumNConc: FixedValue=0.01
          Constant StructuralFraction: FixedValue=0.9
          Constant SenescenceRate: FixedValue=0; Units=/d
          Constant MinimumNConc: FixedValue=0.003
          BiomassRemoval BiomassRemovalDefaults
            OrganBiomassRemovalType Harvest: FractionLiveToRemove=0.5; FractionDeadToRemove=0; FractionLiveToResidue=0.1; FractionDeadToResidue=0
            OrganBiomassRemovalType Cut: FractionLiveToRemove=0.8; FractionDeadToRemove=0; FractionLiveToResidue=0; FractionDeadToResidue=0
            OrganBiomassRemovalType Prune: FractionLiveToRemove=0; FractionDeadToRemove=0; FractionLiveToResidue=0.6; FractionDeadToResidue=0
            OrganBiomassRemovalType Graze: FractionLiveToRemove=0.6; FractionDeadToRemove=0; FractionLiveToResidue=0.2; FractionDeadToResidue=0
            OrganBiomassRemovalType Thin: FractionLiveToRemove=0; FractionDeadToRemove=0; FractionLiveToResidue=0.05; FractionDeadToResidue=0
          PhaseBasedSwitch NitrogenDemandSwitch: Start=Emergence; End=StartGrainFill
          PhaseLookup DMRetranslocationFactor
            PhaseLookupValue VegetativeGrowth: Start=Emergence; End=StartGrainFill
              Constant DMRetranslocationFactor: FixedValue=0
            PhaseLookupValue ReproductiveGrowth: Start=StartGrainFill; End=EndGrainFill
              Constant DMRetranslocationFactor: FixedValue=0.5
          Constant InitialWtFunction: FixedValue=0; Units=g/m^2
          Constant DetachmentRateFunction: FixedValue=0; Units=/d
          Constant MaintenanceRespirationFunction: FixedValue=0; Units=0-1
          Constant DMConversionEfficiency: FixedValue=1; Units=0-1
          VariableReference HeadNumber: VariableName=[Structure].TotalStemPopn
          Constant DMReallocationFactor: FixedValue=0
          VariableReference CriticalNConc: VariableName=[Spike].MinimumNConc.Value()
        GenericOrgan Stem
          Biomass Live
          Biomass Dead
          PhaseLookup StructuralFraction
            PhaseLookupValue VegetativeGrowth: Start=Sowing; End=FlagLeaf
              Constant Fraction: FixedValue=0.7
            PhaseLookupValue ReproductiveGrowth: Start=FlagLeaf; End=HarvestRipe
              Constant Fraction: FixedValue=0.05
          Constant SenescenceRate: FixedValue=0; Units=/d
          LinearInterpolationFunction MaximumNConc: XProperty=[Phenology].Stage
            XYPairs: X=[3, 4, 5, 6]; Y=[0.07, 0.04, 0.015, 0.012]
          Constant MinimumNConc: FixedValue=0.0025
          PhaseBasedSwitch NitrogenDemandSwitch: Start=Emergence; End=StartGrainFill
          Constant NReallocationFactor: FixedValue=0
          PhaseLookup NRetranslocationFactor
            PhaseLookupValue VegetativeGrowth: Start=Sowing; End=Flowering
              Constant Fraction: FixedValue=0
            PhaseLookupValue ReproductiveGrowth: Start=Flowering; End=HarvestRipe
              Constant Fraction: FixedValue=0.5
          PhaseLookup DMRetranslocationFactor: same as RUE.paddock.Wheat.Spike.DMRetranslocationFactor
          PartitionFractionDemandFunction DMDemandFunction
            PhaseLookup PartitionFraction
              PhaseLookupValue PreStemElongation: Start=Emergence; End=TerminalSpikelet
                Constant StemFraction: FixedValue=0.4
              PhaseLookupValue StemElongation: Start=TerminalSpikelet; End=FlagLeaf
                Constant StemFraction: FixedValue=0.6
              PhaseLookupValue EarEmergence: Start=FlagLeaf; End=Flowering
                Constant StemFraction: FixedValue=0.6
          BiomassRemoval BiomassRemovalDefaults: same as RUE.paddock.Wheat.Spike.BiomassRemovalDefaults
          DivideFunction PercentWSC
            VariableReference WSC: VariableName=[Stem].Live.StorageWt
            VariableReference StemWt: VariableName=[Stem].Live.Wt
          Constant InitialWtFunction: FixedValue=0; Units=g/m^2
          Constant DetachmentRateFunction: FixedValue=0; Units=/d
          Constant MaintenanceRespirationFunction: FixedValue=0; Units=0-1
          Constant DMConversionEfficiency: FixedValue=1; Units=0-1
          Constant DMReallocationFactor: FixedValue=0
          VariableReference CriticalNConc: VariableName=[Stem].MinimumNConc.Value()
        CompositeBiomass AboveGround
          Propertys=[[Leaf].Live, [Leaf].Dead, [Stem].Live, [Stem].Dead, [Spike].Live, [Spike].Dead, [Grain].Live, [Grain].Dead]
        CompositeBiomass AboveGroundLive: Propertys=[[Leaf].Live, [Stem].Live, [Spike].Live, [Grain].Live]
        CompositeBiomass AboveGroundDead: Propertys=[[Leaf].Dead, [Stem].Dead, [Spike].Dead, [Grain].Dead]
        CompositeBiomass BelowGround: Propertys=[[Root].Live, [Root].Dead]
        CompositeBiomass Total
          Propertys=[[Leaf].Live, [Leaf].Dead, [Stem].Live, [Stem].Dead, [Root].Live, [Root].Dead, [Spike].Live, [Spike].Dead, [Grain].Live, [Grain].Dead]
        CompositeBiomass TotalLive
          Propertys=[[Leaf].Live, [Stem].Live, [Root].Live, [Spike].Live, [Grain].Live]
        CompositeBiomass TotalDead
          Propertys=[[Leaf].Dead, [Stem].Dead, [Root].Dead, [Spike].Dead, [Grain].Dead]
        CompositeBiomass Ear: Propertys=[[Spike].Live, [Grain].Live, [Spike].Dead, [Grain].Dead]
          Memo
            The Ear composite biomass object includes the Live and dead pools of all organs within the Ear to allow output for total dry matter and Nutrient contents, including total structural, non-structural and metabolic pools.
        CompositeBiomass StemPlusSpike: Propertys=[[Stem].Live, [Spike].Live, [Stem].Dead, [Spike].Dead]
        CultivarFolder Cultivars
          CultivarFolder New Zealand
            Cultivar Alberic
              Command:
                [Phenology].MinimumLeafNumber.FixedValue = 9
                [Phenology].VrnSensitivity.FixedValue = 7
                [Phenology].PpSensitivity.FixedValue = 3
            Cultivar Amarok
              Command:
                [Phenology].MinimumLeafNumber.FixedValue = 9
                [Phenology].VrnSensitivity.FixedValue = 10
                [Phenology].PpSensitivity.FixedValue = 6
                [Phenology].EarlyReproductivePpSensitivity.FixedValue = 5
                [Structure].Phyllochron.BasePhyllochron.FixedValue = 80
            Cultivar Aspiring
              Command:
                [Phenology].MinimumLeafNumber.FixedValue = 9
                [Phenology].VrnSensitivity.FixedValue = 7
                [Phenology].PpSensitivity.FixedValue = 3
            Cultivar BattenWinter
              Command:
                [Phenology].MinimumLeafNumber.FixedValue = 8
                [Phenology].VrnSensitivity.FixedValue = 8
                [Phenology].PpSensitivity.FixedValue = 5
                [Phenology].EarlyReproductivePpSensitivity.FixedValue = 3
                [Structure].Phyllochron.BasePhyllochron.FixedValue = 100
                [Leaf].ExtinctionCoeff.FixedValue = 0.7
            Cultivar BattenSpring
              Command:
                [Phenology].MinimumLeafNumber.FixedValue = 7
                [Phenology].VrnSensitivity.FixedValue = 0
                [Phenology].PpSensitivity.FixedValue = 5
                [Phenology].EarlyReproductivePpSensitivity.FixedValue = 3
                [Structure].Phyllochron.BasePhyllochron.FixedValue = 100
                [Leaf].ExtinctionCoeff.FixedValue = 0.7
            Cultivar Centaur
              Command:
                [Phenology].MinimumLeafNumber.FixedValue = 9
                [Phenology].VrnSensitivity.FixedValue = 7
                [Phenology].PpSensitivity.FixedValue = 3
            Cultivar Claire
              Command:
                [Phenology].MinimumLeafNumber.FixedValue = 8
                [Phenology].VrnSensitivity.FixedValue = 8
                [Phenology].PpSensitivity.FixedValue = 8
                [Phenology].EarlyReproductivePpSensitivity.FixedValue = 3
                [Structure].Phyllochron.BasePhyllochron.FixedValue = 100
            Cultivar Conquest
              Command:
                [Phenology].MinimumLeafNumber.FixedValue = 7
                [Phenology].VrnSensitivity.FixedValue = 0
                [Phenology].PpSensitivity.FixedValue = 3
                [Structure].Phyllochron.BasePhyllochron.FixedValue = 100
            Cultivar Discovery
              Command:
                [Phenology].MinimumLeafNumber.FixedValue = 8.5
                [Phenology].VrnSensitivity.FixedValue = 0
                [Phenology].PpSensitivity.FixedValue = 0
                [Structure].Phyllochron.BasePhyllochron.FixedValue = 80
                [Leaf].CohortParameters.MaxArea.AreaLargestLeaves.FixedValue = 1600
                [Grain].MaximumPotentialGrainSize.FixedValue = 0.051
                [Grain].NumberFunction.GrainNumber.GrainsPerGramOfStem.FixedValue = 25
                [Leaf].ExtinctionCoeff.FixedValue = 0.5
                [Structure].BranchingRate.PotentialBranchingRate.Vegetative.PotentialBranchingRate.XYPairs.Y = 0,0,0,0,4,7,12,20
              Memo
                This is a spring wheat with a high grain number and later tillering
            Cultivar Einstein
              Command:
                [Phenology].MinimumLeafNumber.FixedValue = 9
                [Phenology].VrnSensitivity.FixedValue = 7
                [Phenology].PpSensitivity.FixedValue = 3
            Cultivar Exceed
              Command:
                [Phenology].MinimumLeafNumber.FixedValue = 9
                [Phenology].VrnSensitivity.FixedValue = 7
                [Phenology].PpSensitivity.FixedValue = 3
            Cultivar Majestic
              Command:
                [Phenology].MinimumLeafNumber.FixedValue = 9
                [Phenology].VrnSensitivity.FixedValue = 7
                [Phenology].PpSensitivity.FixedValue = 3
            Cultivar Option
              Command:
                [Phenology].MinimumLeafNumber.FixedValue = 9
                [Phenology].VrnSensitivity.FixedValue = 7
                [Phenology].PpSensitivity.FixedValue = 3
            Cultivar Otane
              Command:
                [Phenology].MinimumLeafNumber.FixedValue = 6
                [Phenology].VrnSensitivity.FixedValue = 0
                [Phenology].PpSensitivity.FixedValue = 4
                [Phenology].EarlyReproductivePpSensitivity.FixedValue = 2
                [Structure].Phyllochron.BasePhyllochron.FixedValue = 100
            Cultivar Pennant
              Command:
                [Phenology].MinimumLeafNumber.FixedValue = 9
                [Phenology].VrnSensitivity.FixedValue = 7
                [Phenology].PpSensitivity.FixedValue = 3
            Cultivar Regency
              Command:
                [Phenology].MinimumLeafNumber.FixedValue = 9
                [Phenology].VrnSensitivity.FixedValue = 7
                [Phenology].PpSensitivity.FixedValue = 3
            Cultivar Richmond
              Command:
                [Phenology].MinimumLeafNumber.FixedValue = 9
                [Phenology].VrnSensitivity.FixedValue = 7
                [Phenology].PpSensitivity.FixedValue = 3
            Cultivar Robigus
              Command:
                [Phenology].MinimumLeafNumber.FixedValue = 9
                [Phenology].VrnSensitivity.FixedValue = 7
                [Phenology].PpSensitivity.FixedValue = 3
            Cultivar Rongotea
              Command:
                [Phenology].MinimumLeafNumber.FixedValue = 7
                [Phenology].VrnSensitivity.FixedValue = 0
                [Phenology].PpSensitivity.FixedValue = 2
                [Phenology].EarlyReproductivePpSensitivity.FixedValue = 3
                [Structure].Phyllochron.BasePhyllochron.FixedValue = 100
            Cultivar Rubric
              Command:
                [Phenology].MinimumLeafNumber.FixedValue = 9
                [Phenology].VrnSensitivity.FixedValue = 7
                [Phenology].PpSensitivity.FixedValue = 3
            Cultivar Sage
              Command:
                [Phenology].MinimumLeafNumber.FixedValue = 9
                [Phenology].VrnSensitivity.FixedValue = 7
                [Phenology].PpSensitivity.FixedValue = 3
            Cultivar Saracen
              Command:
                [Phenology].MinimumLeafNumber.FixedValue = 9
                [Phenology].VrnSensitivity.FixedValue = 7
                [Phenology].PpSensitivity.FixedValue = 3
            Cultivar Savannah
              Command:
                [Phenology].MinimumLeafNumber.FixedValue = 9
                [Phenology].VrnSensitivity.FixedValue = 7
                [Phenology].PpSensitivity.FixedValue = 3
            Cultivar Solstice
              Command:
                [Phenology].MinimumLeafNumber.FixedValue = 9
                [Phenology].VrnSensitivity.FixedValue = 7
                [Phenology].PpSensitivity.FixedValue = 3
            Cultivar Tanker
              Command:
                [Phenology].MinimumLeafNumber.FixedValue = 9
                [Phenology].VrnSensitivity.FixedValue = 7
                [Phenology].PpSensitivity.FixedValue = 3
            Cultivar Tribute
              Command:
                [Phenology].MinimumLeafNumber.FixedValue = 9
                [Phenology].VrnSensitivity.FixedValue = 7
                [Phenology].PpSensitivity.FixedValue = 3
            Cultivar Wakanui
              Command:
                [Phenology].MinimumLeafNumber.FixedValue = 8
                [Phenology].VrnSensitivity.FixedValue = 10
                [Phenology].PpSensitivity.FixedValue = 0
                [Phenology].EarlyReproductiveLongDayBase.FixedValue = 4
                [Structure].Phyllochron.BasePhyllochron.FixedValue = 100
                [Phenology].DailyVernalisation.TempResponseProfile.XYPairs.X = 0,1,8
                [Phenology].DailyVernalisation.TempResponseProfile.XYPairs.Y = 0,1.204,0
                [Leaf].ExtinctionCoeff.FixedValue = 0.7
                [Grain].NumberFunction.GrainNumber.GrainsPerGramOfStem.FixedValue = 17
                [Leaf].CohortParameters.MaxArea.AreaLargestLeaves.FixedValue = 3000
            Cultivar Weston
              Command:
                [Phenology].MinimumLeafNumber.FixedValue = 9
                [Phenology].VrnSensitivity.FixedValue = 7
                [Phenology].PpSensitivity.FixedValue = 3
          CultivarFolder Australia
            Cultivar Axe
              Command:
                [Phenology].MinimumLeafNumber.FixedValue = 5
                [Phenology].VrnSensitivity.FixedValue = 0
                [Phenology].PpSensitivity.FixedValue = 4
                [Phenology].EarlyReproductivePpSensitivity.FixedValue = 0
                [Structure].Phyllochron.BasePhyllochron.FixedValue = 100
            Cultivar Bolac
              Command:
                [Phenology].MinimumLeafNumber.FixedValue = 6
                [Phenology].VrnSensitivity.FixedValue = 0
                [Phenology].PpSensitivity.FixedValue = 4
                [Structure].Phyllochron.BasePhyllochron.FixedValue = 100
            Cultivar Cunningham
              Command:
                [Phenology].MinimumLeafNumber.FixedValue = 6
                [Phenology].VrnSensitivity.FixedValue = 0
                [Phenology].PpSensitivity.FixedValue = 4
                [Structure].Phyllochron.BasePhyllochron.FixedValue = 100
              Alias Anlace
              Alias Arrivato
              Alias Babbler
              Alias Barham
              Alias Baxter
              Alias Bowie
              Alias Buckley
              Alias Buckly
              Alias Burunga
              Alias Camm
              Alias Carinya
              Alias ChiefCLPlus
              Alias CLF_Janz
              Alias Dagger
              Alias DBAAurora
              Alias ElmoreCLPlus
              Alias Espada
              Alias Frame
              Alias Gazelle
              Alias Halberd
              Alias Hybrid_Meteor
              Alias JusticaCLPlus
              Alias Preston
              Alias Saphire
              Alias Scout
              Alias Stiletto
              Alias Ventura
              Alias Wallup
            Cultivar Derrimut
              Command:
                [Phenology].MinimumLeafNumber.FixedValue = 6
                [Phenology].VrnSensitivity.FixedValue = 0
                [Phenology].PpSensitivity.FixedValue = 4
                [Structure].Phyllochron.BasePhyllochron.FixedValue = 100
            Cultivar EGAGregory
              Command:
                [Phenology].MinimumLeafNumber.FixedValue = 6
                [Phenology].VrnSensitivity.FixedValue = 1
                [Phenology].PpSensitivity.FixedValue = 4
                [Structure].Phyllochron.BasePhyllochron.FixedValue = 100
              Alias Gregory
              Alias Lancer
            Cultivar GattonHartog
              Command:
                [Phenology].MinimumLeafNumber.FixedValue = 8
                [Phenology].VrnSensitivity.FixedValue = 0
                [Phenology].PpSensitivity.FixedValue = 4
            Cultivar Gamenya
              Command:
                [Phenology].MinimumLeafNumber.FixedValue = 5
                [Phenology].VrnSensitivity.FixedValue = 0
                [Phenology].PpSensitivity.FixedValue = 3.5
                [Structure].Phyllochron.BasePhyllochron.FixedValue = 100
                [Phenology].EarlyReproductivePpSensitivity.FixedValue = 0
                [Phenology].EarlyReproductiveLongDayBase.FixedValue
            Cultivar Gauntlet
              Command:
                [Phenology].MinimumLeafNumber.FixedValue = 5
                [Phenology].VrnSensitivity.FixedValue = 0
                [Phenology].PpSensitivity.FixedValue = 4
                [Structure].Phyllochron.BasePhyllochron.FixedValue = 100
              Alias Braewood
              Alias Chara
              Alias Clearfield_stl
              Alias Drysdale
              Alias Envoy
              Alias Estoc
              Alias Giles
              Alias Harper
              Alias Krichauff
              Alias Magenta
              Alias Mitch
              Alias Phantom
              Alias Pugsley
              Alias Sentinel
              Alias Silverstar
              Alias Suneca
              Alias Sunlin
              Alias Sunvale
              Alias Trojan
              Alias Strzelecki
            Cultivar Gladius
              Command:
                [Phenology].MinimumLeafNumber.FixedValue = 6
                [Phenology].VrnSensitivity.FixedValue = 0
                [Phenology].PpSensitivity.FixedValue = 5
                [Structure].Phyllochron.BasePhyllochron.FixedValue = 100
            Cultivar Gutha
              Command:
                [Phenology].MinimumLeafNumber.FixedValue = 6
                [Phenology].VrnSensitivity.FixedValue = 0
                [Phenology].PpSensitivity.FixedValue = 5
                [Structure].Phyllochron.BasePhyllochron.FixedValue = 100
                [Grain].MaximumPotentialGrainSize.FixedValue = 0.041
                [Grain].NumberFunction.GrainNumber.GrainsPerGramOfStem.FixedValue = 17
            Cultivar H45
              Command:
                [Phenology].MinimumLeafNumber.FixedValue = 6
                [Phenology].VrnSensitivity.FixedValue = 0
                [Phenology].PpSensitivity.FixedValue = 4
                [Structure].Phyllochron.BasePhyllochron.FixedValue = 100
              Alias Saintly
              Alias Tamarinrock
              Alias Waagin
              Alias Wollaroi
              Alias Zippy
            Cultivar H46
              Command:
                [Phenology].MinimumLeafNumber.FixedValue = 8
                [Phenology].VrnSensitivity.FixedValue = 0
                [Phenology].PpSensitivity.FixedValue = 4
                [Structure].Phyllochron.BasePhyllochron.FixedValue = 100
            Cultivar Hartog
              Command:
                [Phenology].MinimumLeafNumber.FixedValue = 6
                [Phenology].VrnSensitivity.FixedValue = 0
                [Phenology].PpSensitivity.FixedValue = 5
                [Structure].Phyllochron.BasePhyllochron.FixedValue = 100
                [Grain].MaximumPotentialGrainSize.FixedValue = 0.041
              Alias Annuello
              Alias Carnamah
              Alias Catalina
              Alias CLF_Stiletto
              Alias Cobra
              Alias Corack
              Alias Correll
              Alias Diamondbird
              Alias Gladius
              Alias Goroke
              Alias GrenadeCLPlus
              Alias Guardian
              Alias Halbred
              Alias Impala
              Alias Justica
              Alias Kord
              Alias Merlin
              Alias Mitre
              Alias Peake
              Alias Shield
              Alias Spitfire
              Alias Sunguard
              Alias Sunstate
              Alias Yallaroi
              Alias Yawa
              Alias Yitpi
            Cultivar Hibred_Mercury
              Command:
                [Phenology].MinimumLeafNumber.FixedValue = 6
                [Phenology].VrnSensitivity.FixedValue = 0
                [Phenology].PpSensitivity.FixedValue = 4
                [Structure].Phyllochron.BasePhyllochron.FixedValue = 100
              Alias Agtscythe
              Alias Arrino
              Alias Bonnie_rock
              Alias Bowerbird
              Alias Condo
              Alias Dart
              Alias Dollarbird
              Alias Emurock
              Alias Hyperno
              Alias ImposeCLPlus
              Alias Kalka
              Alias Kirchauff
              Alias Kukri
              Alias Hunter
              Alias LRPBArrow
              Alias Mace
              Alias Ouyen
              Alias Ruby
              Alias Tamaroi
              Alias Young
              Alias Katana
            Cultivar Janz
              Command:
                [Phenology].MinimumLeafNumber.FixedValue = 6
                [Phenology].VrnSensitivity.FixedValue = 1
                [Phenology].PpSensitivity.FixedValue = 4
                [Structure].Phyllochron.BasePhyllochron.FixedValue = 100
            Cultivar Kelallac
              Command:
                [Phenology].MinimumLeafNumber.FixedValue = 8
                [Phenology].VrnSensitivity.FixedValue = 0
                [Phenology].PpSensitivity.FixedValue = 4
                [Structure].Phyllochron.BasePhyllochron.FixedValue = 100
              Alias Beaufort
              Alias Calingiri
              Alias Endure
              Alias Forrest
              Alias Scenario
              Alias Zen
            Cultivar Kennedy
              Command:
                [Phenology].MinimumLeafNumber.FixedValue = 8
                [Phenology].VrnSensitivity.FixedValue = 0
                [Phenology].PpSensitivity.FixedValue = 4
                [Structure].Phyllochron.BasePhyllochron.FixedValue = 100
            Cultivar Lang
              Command:
                [Phenology].MinimumLeafNumber.FixedValue = 6
                [Phenology].VrnSensitivity.FixedValue = 0
                [Phenology].PpSensitivity.FixedValue = 5
                [Structure].Phyllochron.BasePhyllochron.FixedValue = 100
            Cultivar Livingston
              Command:
                [Phenology].MinimumLeafNumber.FixedValue = 5
                [Phenology].VrnSensitivity.FixedValue = 0
                [Phenology].PpSensitivity.FixedValue = 4
                [Structure].Phyllochron.BasePhyllochron.FixedValue = 100
            Cultivar Lincoln
              Command:
                [Phenology].MinimumLeafNumber.FixedValue = 6
                [Phenology].VrnSensitivity.FixedValue = 0
                [Phenology].PpSensitivity.FixedValue = 4
                [Structure].Phyllochron.BasePhyllochron.FixedValue = 100
              Alias Crusader
            Cultivar Mace
              Command:
                [Phenology].MinimumLeafNumber.FixedValue = 6
                [Phenology].VrnSensitivity.FixedValue = 0
                [Phenology].PpSensitivity.FixedValue = 4
                [Structure].Phyllochron.BasePhyllochron.FixedValue = 100
            Cultivar MacKellar
              Command:
                [Phenology].MinimumLeafNumber.FixedValue = 7
                [Phenology].VrnSensitivity.FixedValue = 5
                [Phenology].PpSensitivity.FixedValue = 5
                [Phenology].EarlyReproductiveLongDayBase.FixedValue = 3.5
                [Structure].Phyllochron.BasePhyllochron.FixedValue = 100
              Alias Adagio
              Alias Brennan
              Alias Declic
              Alias Revenue
            Cultivar Matong
              Command:
                [Phenology].MinimumLeafNumber.FixedValue = 7
                [Phenology].VrnSensitivity.FixedValue = 1
                [Phenology].PpSensitivity.FixedValue = 4
                [Structure].Phyllochron.BasePhyllochron.FixedValue = 100
            Cultivar McCubbin
              Command:
                [Phenology].MinimumLeafNumber.FixedValue = 8
                [Phenology].VrnSensitivity.FixedValue = 0
                [Phenology].PpSensitivity.FixedValue = 5
                [Structure].Phyllochron.BasePhyllochron.FixedValue = 90
            Cultivar Mercury
              Command:
                [Phenology].MinimumLeafNumber.FixedValue = 7
                [Phenology].VrnSensitivity.FixedValue = 0
                [Phenology].PpSensitivity.FixedValue = 4
                [Phenology].EarlyReproductiveLongDayBase.FixedValue = 3.5
                [Structure].Phyllochron.BasePhyllochron.FixedValue = 80
            Cultivar Ruby
              Command:
                [Phenology].MinimumLeafNumber.FixedValue = 8
                [Phenology].VrnSensitivity.FixedValue = 0
                [Phenology].PpSensitivity.FixedValue = 4
                [Structure].Phyllochron.BasePhyllochron.FixedValue = 100
            Cultivar Spear
              Command:
                [Phenology].MinimumLeafNumber.FixedValue = 6
                [Phenology].VrnSensitivity.FixedValue = 0
                [Phenology].PpSensitivity.FixedValue = 4
                [Structure].Phyllochron.BasePhyllochron.FixedValue = 100
                [Grain].MaximumPotentialGrainSize.FixedValue = 0.045
            Cultivar Sunbri
              Command:
                [Phenology].MinimumLeafNumber.FixedValue = 7
                [Phenology].VrnSensitivity.FixedValue = 0
                [Phenology].PpSensitivity.FixedValue = 5
                [Structure].Phyllochron.BasePhyllochron.FixedValue = 100
            Cultivar Sunco
              Command:
                [Phenology].MinimumLeafNumber.FixedValue = 6.5
                [Phenology].VrnSensitivity.FixedValue = 0
                [Phenology].PpSensitivity.FixedValue = 3.5
                [Phenology].EarlyReproductivePpSensitivity.FixedValue = 4
                [Structure].Phyllochron.BasePhyllochron.FixedValue = 100
              Alias Advantage
              Alias Bellaroi
              Alias Caparoi
              Alias Ellison
              Alias Suntop
            Cultivar Ventura
              Command:
                [Phenology].MinimumLeafNumber.FixedValue = 8
                [Phenology].VrnSensitivity.FixedValue = 0
                [Phenology].PpSensitivity.FixedValue = 4
                [Structure].Phyllochron.BasePhyllochron.FixedValue = 100
            Cultivar Wedgetail
              Command:
                [Phenology].MinimumLeafNumber.FixedValue = 8
                [Phenology].VrnSensitivity.FixedValue = 0
                [Phenology].PpSensitivity.FixedValue = 4
                [Structure].Phyllochron.BasePhyllochron.FixedValue = 100
              Alias Lorikeet
              Alias Rosella
              Alias Whistler
              Alias Wylah
              Alias Eaglehawk
            Cultivar Westonia
              Command:
                [Phenology].MinimumLeafNumber.FixedValue = 5
                [Phenology].VrnSensitivity.FixedValue = 0
                [Phenology].PpSensitivity.FixedValue = 4
                [Structure].Phyllochron.BasePhyllochron.FixedValue = 100
            Cultivar Wilgoyne
              Command:
                [Phenology].MinimumLeafNumber.FixedValue = 5
                [Phenology].VrnSensitivity.FixedValue = 0
                [Phenology].PpSensitivity.FixedValue = 4
                [Structure].Phyllochron.BasePhyllochron.FixedValue = 100
                [Grain].NumberFunction.GrainNumber.GrainsPerGramOfStem.FixedValue = 20
                [Grain].MaximumPotentialGrainSize.FixedValue = 0.045
            Cultivar Wyalkatchem
              Command:
                [Phenology].MinimumLeafNumber.FixedValue = 8
                [Phenology].VrnSensitivity.FixedValue = 0
                [Phenology].PpSensitivity.FixedValue = 4
                [Structure].Phyllochron.BasePhyllochron.FixedValue = 100
            Cultivar Yitpi
              Command:
                [Phenology].MinimumLeafNumber.FixedValue = 8
                [Phenology].VrnSensitivity.FixedValue = 0
                [Phenology].PpSensitivity.FixedValue = 5
                [Phenology].EarlyReproductiveLongDayBase.FixedValue = 2.5
                [Phenology].EarlyReproductivePpSensitivity.FixedValue = 5
                [Structure].Phyllochron.BasePhyllochron.FixedValue = 80
            Cultivar Young
              Command:
                [Phenology].MinimumLeafNumber.FixedValue = 8
                [Phenology].VrnSensitivity.FixedValue = 0
                [Phenology].PpSensitivity.FixedValue = 4
                [Structure].Phyllochron.BasePhyllochron.FixedValue = 100
          CultivarFolder Turkey
            Cultivar Konya
              Command:
                [Phenology].MinimumLeafNumber.FixedValue = 7
                [Phenology].VrnSensitivity.FixedValue = 0
                [Phenology].PpSensitivity.FixedValue = 4
                [Structure].Phyllochron.BasePhyllochron.FixedValue = 100
                [Grain].NumberFunction.GrainNumber.GrainsPerGramOfStem.FixedValue = 15
                [Grain].MaximumPotentialGrainSize.FixedValue = 0.050
                [Grain].MaximumNConc.FixedValue = 0.026
                [Phenology].GrainFilling.Target.FixedValue = 800
          CultivarFolder China
            Cultivar Keyu13
              Command:
                [Phenology].MinimumLeafNumber.FixedValue = 7
                [Phenology].VrnSensitivity.FixedValue = 5
                [Phenology].PpSensitivity.FixedValue = 3
                [Structure].Phyllochron.BasePhyllochron.FixedValue = 100
          CultivarFolder USA
            Cultivar Yecora
              Command:
                [Phenology].MinimumLeafNumber.FixedValue = 6
                [Phenology].VrnSensitivity.FixedValue = 0
                [Phenology].PpSensitivity.FixedValue = 4
                [Structure].Phyllochron.BasePhyllochron.FixedValue = 90
                [Leaf].CohortParameters.MaxArea.AreaLargestLeaves.FixedValue = 4000
            Cultivar Rex
              Command:
                [Phenology].MinimumLeafNumber.FixedValue = 7
                [Phenology].VrnSensitivity.FixedValue = 6
                [Phenology].PpSensitivity.FixedValue = 4
                [Grain].NumberFunction.GrainNumber.GrainsPerGramOfStem.FixedValue = 18
                [Grain].MaximumNConc.FixedValue = 0.02
            Cultivar Nugaines
              Command:
                [Phenology].MinimumLeafNumber.FixedValue = 7
                [Phenology].VrnSensitivity.FixedValue = 6
                [Phenology].PpSensitivity.FixedValue = 4
                [Grain].NumberFunction.GrainNumber.GrainsPerGramOfStem.FixedValue = 20
                [Grain].MaximumNConc.FixedValue = 0.02
            Cultivar Hyslop
              Command:
                [Phenology].MinimumLeafNumber.FixedValue = 7
                [Phenology].VrnSensitivity.FixedValue = 6
                [Phenology].PpSensitivity.FixedValue = 4
                [Grain].NumberFunction.GrainNumber.GrainsPerGramOfStem.FixedValue = 22
                [Grain].MaximumNConc.FixedValue = 0.02
            Cultivar Stephens
              Command:
                [Phenology].MinimumLeafNumber.FixedValue = 7
                [Phenology].VrnSensitivity.FixedValue = 6
                [Phenology].PpSensitivity.FixedValue = 4
                [Grain].NumberFunction.GrainNumber.GrainsPerGramOfStem.FixedValue = 25
                [Grain].MaximumNConc.FixedValue = 0.02
          CultivarFolder Europe
            Cultivar Dekan
              Command:
                [Phenology].MinimumLeafNumber.FixedValue = 9
                [Phenology].VrnSensitivity.FixedValue = 7
                [Phenology].PpSensitivity.FixedValue = 3
                [Phenology].EarlyReproductivePpSensitivity.FixedValue = 3
                [Structure].Phyllochron.BasePhyllochron.FixedValue = 100
                [Leaf].ExtinctionCoeff.FixedValue = 0.8
            Cultivar Rosario
              Command:
                [Phenology].MinimumLeafNumber.FixedValue = 9
                [Phenology].VrnSensitivity.FixedValue = 7
                [Phenology].PpSensitivity.FixedValue = 3
                [Phenology].EarlyReproductivePpSensitivity.FixedValue = 3
                [Structure].Phyllochron.BasePhyllochron.FixedValue = 100
                [Leaf].ExtinctionCoeff.FixedValue = 0.8
            Cultivar Ararat
              Command:
                [Phenology].MinimumLeafNumber.FixedValue = 9
                [Phenology].VrnSensitivity.FixedValue = 7
                [Phenology].PpSensitivity.FixedValue = 3
                [Phenology].EarlyReproductivePpSensitivity.FixedValue = 3
                [Structure].Phyllochron.BasePhyllochron.FixedValue = 100
                [Leaf].ExtinctionCoeff.FixedValue = 0.8
          CultivarFolder Africa
            Cultivar HAR1685
              Command:
                [Phenology].MinimumLeafNumber.FixedValue = 7
                [Phenology].VrnSensitivity.FixedValue = 0
                [Phenology].PpSensitivity.FixedValue = 3
                [Structure].Phyllochron.BasePhyllochron.FixedValue = 100
                [Grain].NumberFunction.GrainNumber.GrainsPerGramOfStem.FixedValue = 17
                [Phenology].GrainFilling.Target.FixedValue = 350
          CultivarFolder Iran
            Cultivar Gorgan
              Command:
                [Phenology].MinimumLeafNumber.FixedValue = 7
                [Phenology].VrnSensitivity.FixedValue = 0
                [Phenology].PpSensitivity.FixedValue = 4
                [Structure].Phyllochron.BasePhyllochron.FixedValue = 100
      Manager Harvesting
```csharp
using System;
using Models.Core;
using System.Collections.Generic;
using System.Text;
using Models.Soils;
using Models.PMF;
using Models;
using System.Xml.Serialization;
using APSIM.Shared.Utilities;

namespace Models
{
	[Serializable] 
	public class Script : Model
	{
		[Link] Plant Wheat;
		[EventSubscribe("DoManagement")]
		private void OnDoManagement(object sender, EventArgs e)
		{
			if (Wheat.Phenology.CurrentPhaseName == "Maturing")
			{
				Wheat.Harvest();
				Wheat.EndCrop();
			}
		}
	}
}
```
  Simulation Photosynthesis
    Clock: StartDate=1995-06-13; EndDate=1995-10-30
    Summary summaryfile
    Weather: FileName=%root%\Tests\Validation\Wheat\APS26.met
    SoilArbitrator Soil Arbitrator
    Zone paddock: Area=1; Slope=0
      Irrigation
      Fertiliser
      Manager ApplyFertiliser: same as RUE.paddock.ApplyFertiliser
      Soil APS26Field: same as RUE.paddock.APS26Field
      SurfaceOrganicMatter: same as RUE.paddock.SurfaceOrganicMatter
      Operations IrrigationSchedule: same as RUE.paddock.IrrigationSchedule
      MicroClimate: a_interception=0; b_interception=1; c_interception=0; d_interception=0; soil_albedo=0.3; sun_angle=15; soil_heat_flux_fraction=0.4; night_interception_fraction=0.5; refheight=2; albedo=0.15; emissivity=0.96; RadIntTotal=0
      Manager Calculations: same as RUE.paddock.Calculations
      Report SupReport: EventNames=[Clock].DoReport
        VariableNames:
          [Clock].Today
          [Leaf].ApexNum
          [Leaf].ApexGroupAge
          [Leaf].ApexGroupSize
      SoluteManager
      Plant Wheat: CropType=Wheat
        Memo TitlePage: same as RUE.paddock.Wheat.TitlePage
        OrganArbitrator Arbitrator
          RelativeAllocation NArbitrator
          RelativeAllocation DMArbitrator
        Phenology: same as RUE.paddock.Wheat.Phenology
        Structure: same as RUE.paddock.Wheat.Structure
        ReproductiveOrgan Grain: same as RUE.paddock.Wheat.Grain
        Root: same as RUE.paddock.Wheat.Root
        Leaf: MaxCover=1; Albedo=0.25; Gsmax=0.011; R50=150; MicroClimatePresent=true; KDead=0.3; MaximumMainStemLeafNumber=30
          zero: GrowthRespiration, MaintenanceRespiration, CurrentExpandingLeaf, StartFractionExpanded, FractionNextleafExpanded, DeadNodesYesterday, FRGR, PotentialEP, DMConversionEfficiency, TipsAtEmergence, CohortsAtInitialisation, FractionDied
          ApexTiller
          LeafCohort InitialLeaves[1]: same as RUE.paddock.Wheat.Leaf.InitialLeaves[1]
          LeafCohort InitialLeaves[2]: same as RUE.paddock.Wheat.Leaf.InitialLeaves[2]
          CompositeBiomass Live: Propertys=[[Leaf].CohortLive]
          CompositeBiomass Dead: Propertys=[[Leaf].CohortDead]
          ArrayBiomass CohortArrayLive: Propertys=[[Leaf].Live]; ArraySize=[Leaf].MaxNodeNo
          ArrayBiomass CohortArrayDead: Propertys=[[Leaf].Dead]; ArraySize=[Leaf].MaxNodeNo
          LeafCohortParameters CohortParameters: same as RUE.paddock.Wheat.Leaf.CohortParameters
          Photosynthesis
          Constant FrostFraction: FixedValue=0
          VariableReference ThermalTime: VariableName=[Phenology].ThermalTime.Value()
          MinimumFunction FRGRFunction: same as RUE.paddock.Wheat.Leaf.FRGRFunction
          BiomassRemoval BiomassRemovalDefaults: same as RUE.paddock.Wheat.Leaf.BiomassRemovalDefaults
          Constant ExtinctionCoeff: FixedValue=0.5
          Constant StructuralFraction: FixedValue=0.5
          Constant DMConversionEfficiencyFunction: FixedValue=1
          ApexStandard
        GenericOrgan Spike: same as RUE.paddock.Wheat.Spike
        GenericOrgan Stem: same as RUE.paddock.Wheat.Stem
        CompositeBiomass AboveGround
          Propertys=[[Leaf].Live, [Leaf].Dead, [Stem].Live, [Stem].Dead, [Spike].Live, [Spike].Dead, [Grain].Live, [Grain].Dead]
        CompositeBiomass AboveGroundLive: Propertys=[[Leaf].Live, [Stem].Live, [Spike].Live, [Grain].Live]
        CompositeBiomass AboveGroundDead: Propertys=[[Leaf].Dead, [Stem].Dead, [Spike].Dead, [Grain].Dead]
        CompositeBiomass BelowGround: Propertys=[[Root].Live, [Root].Dead]
        CompositeBiomass Total
          Propertys=[[Leaf].Live, [Leaf].Dead, [Stem].Live, [Stem].Dead, [Root].Live, [Root].Dead, [Spike].Live, [Spike].Dead, [Grain].Live, [Grain].Dead]
        CompositeBiomass TotalLive
          Propertys=[[Leaf].Live, [Stem].Live, [Root].Live, [Spike].Live, [Grain].Live]
        CompositeBiomass TotalDead
          Propertys=[[Leaf].Dead, [Stem].Dead, [Root].Dead, [Spike].Dead, [Grain].Dead]
        CompositeBiomass Ear: same as RUE.paddock.Wheat.Ear
        CompositeBiomass StemPlusSpike: Propertys=[[Stem].Live, [Spike].Live, [Stem].Dead, [Spike].Dead]
        CultivarFolder Cultivars: same as RUE.paddock.Wheat.Cultivars
      Manager Harvesting: same as RUE.paddock.Harvesting
