folder simulations: version=37; creator=Apsim 7.10-r0
  simulation Blank Simulation
    metfile met: filename=%apsim%/Examples/MetFiles/Goond.met
    clock
      start_date = 1/01/1940  # Enter the start date of the simulation
      end_date = 31/12/1989  # Enter the end date of the simulation
    summaryfile
    area paddock
      folder Manager folder
      Soil Vertosol No7 (PAWC-204 No519-Generic): ASCOrder=Vertosol; SoilType=Clay; Site=Generic-Qld; State=Generic; Country=Australia; NaturalVegetation=NA; ApsoilNumber=519-GENERIC; Latitude=-27.183286; Longitude=151.263748; LocationAccuracy=Regional Soil Type; YearOfSampling=0; DataSource=Generic soil. CSIRO Sustainable Ecosystems, Toowoomba
        Comments=Generic soil developed by Allan Peake. 'Typical Vertosol' soil properties have been calculated as the average of vertosols with similar characteristics from within the Apsoil database. Groupings were made on the basis of bulk density. Measured BD, DUL and CLL for the groups were then averaged to derive the characteristics of the typical Vertosols. They can then be used in conjunction with measured soil water to simplify the selection of appropriate Vertosols, for paddocks where full soil characterisations have not yet been completed. For more information see Peake et al. 2010: ‘A rapid method for estimating the plant available water capacity of Vertosols’, 2010 Australian Agronomy Conference. Typical Vertosols are different to 'Generic' soil types elsewhere in the Apsoil database, which are representative of certain soil types and districts, but have not been calculated from large numbers of similar, characterised soils.
        Water
          Thickness  BD    AirDry  LL15   DUL    SAT
          150        1.33  0.109   0.217  0.418  0.468
          150        1.34  0.18    0.225  0.413  0.463
          300        1.34  0.244   0.244  0.414  0.464
          300        1.37  0.244   0.244  0.404  0.454
          300        1.41  0.244   0.244  0.39   0.44
          300        1.43  0.244   0.244  0.382  0.432
          300        1.44  0.244   0.244  0.377  0.427
          BD source: Calculated from gravimetric moisture when profile wet but drained
          AirDry, LL15 source: Estimated based on local knowledge
          DUL source: FM & E
          SAT source: Calculated from measured, estimated or calculated BD
          SoilCrop wheat: LL=[0.217, 0.225, 0.244, 0.262, 0.294, 0.324, 0.356]; KL=[0.06, 0.06, 0.06, 0.04, 0.04, 0.02, 0.02]; XF=[1, 1, 1, 1, 1, 1, 1]
            LL source: Field measured and checked for sensibility
          SoilCrop lentil: same as Blank Simulation.paddock.Vertosol No7 (PAWC-204 No519-Generic).Water.wheat
          SoilCrop cotton: LL=[0.217, 0.225, 0.244, 0.262, 0.294, 0.324, 0.356]; KL=[0.1, 0.1, 0.1, 0.1, 0.09, 0.07, 0.05]; XF=[1, 1, 1, 1, 1, 1, 1]
            LL source: Field measured and checked for sensibility
          SoilCrop sorghum: LL=[0.217, 0.225, 0.244, 0.262, 0.294, 0.324, 0.356]; KL=[0.07, 0.07, 0.07, 0.05, 0.05, 0.04, 0.03]; XF=[1, 1, 1, 1, 1, 1, 1]
            LL source: Field measured and checked for sensibility
        SoilWater: SummerCona=3.5; SummerU=6; SummerDate=1-Nov; WinterCona=2.5; WinterU=4; WinterDate=1-Apr; DiffusConst=40; DiffusSlope=16; Salb=0.12; CN2Bare=73; CNRed=20; CNCov=0.8; Thickness=[150, 150, 300, 300, 300, 300, 300]; SWCON=[0.3, 0.3, 0.3, 0.3, 0.3, 0.3, 0.3]
        SoilOrganicMatter: RootCN=40; RootWt=1000; SoilCN=12; EnrACoeff=7.4; EnrBCoeff=0.2; OCUnits=WalkleyBlack
          Thickness  OC    FBiom  FInert
          150        1     0.04   0.4
          150        0.8   0.02   0.6
          300        0.5   0.02   0.8
          300        0.25  0.02   1
          300        0.15  0.01   1
          300        0.1   0.01   1
          300        0.1   0.01   1
          OC source: Estimated based on local knowledge
        Analysis: Thickness=[150, 150, 300, 300, 300, 300, 300]; PH=[8.4, 8.6, 8.6, 8, 7.1, 6.5, 6.5]; PHUnits=Water; BoronUnits=HotWater
          PH source: Measured
        Sample Initial Conditions: NO3Units=kgha; NH4Units=kgha; SWUnits=Volumetric; OCUnits=Total; PHUnits=Water
          Thickness  NO3  NH4
          150        21   0
          150        7    0
          300        3.5  0
          300        3.5  0
          300        0    0
          300        0    0
          300        0    0
        InitialWater: FractionFull=1; PercentMethod=FilledFromTop
      Soil Sandy Loam (Kerribee No359): ASCOrder=Calcarosol; SoilType=Sandy loam; Site=Kerribee; NearestTown=Paringi; Region=Lower Western; State=New South Wales; Country=Australia; NaturalVegetation=Belah and mallee; ApsoilNumber=359; Latitude=-34.288; Longitude=142.371; LocationAccuracy=+/- 20m; YearOfSampling=0
        DataSource=Based on Soil Characterisation undertaken by Whitbread/Davoren GRDC Soil water project and Jeff Baldock MSF data
        Water
          Thickness  BD     AirDry  LL15   DUL   SAT
          100        1.286  0.016   0.028  0.13  0.46
          100        1.529  0.048   0.065  0.17  0.37
          200        1.441  0.07    0.07   0.19  0.41
          200        1.486  0.1     0.1    0.22  0.39
          200        1.57   0.11    0.11   0.22  0.36
          200        1.626  0.11    0.11   0.21  0.32
          200        1.626  0.1     0.1    0.19  0.32
          300        1.626  0.14    0.14   0.19  0.32
          SoilCrop wheat: LL=[0.028, 0.065, 0.1, 0.105, 0.11, 0.11, 0.11, 0.14]; KL=[0.06, 0.06, 0.06, 0.06, 0.04, 0.04, 0.04, 0.02]; XF=[1, 1, 1, 1, 1, 1, 1, 1]
          SoilCrop lentil: LL=[0.028, 0.065, 0.1, 0.105, 0.11, 0.11, 0.11, 0.14]; KL=[0.06, 0.06, 0.06, 0.06, 0.04, 0.04, 0.04, 0.02]; XF=[1, 1, 1, 1, 1, 1, 1, 1]
          SoilCrop canola: LL=[0.028, 0.065, 0.1, 0.115, 0.115, 0.13, 0.15, 0.14]; KL=[0.06, 0.06, 0.06, 0.06, 0.04, 0.04, 0.04, 0.02]; XF=[1, 1, 1, 1, 1, 1, 0, 0]
          SoilCrop fieldpea: LL=[0.028, 0.065, 0.1, 0.115, 0.115, 0.13, 0.15, 0.14]; KL=[0.06, 0.06, 0.06, 0.06, 0.04, 0.04, 0.04, 0.02]; XF=[1, 1, 1, 1, 1, 1, 0, 0]
          SoilCrop weed: LL=[0.05, 0.068, 0.09, 0.131, 0.139, 0.16, 0.16, 0.16]; KL=[0.06, 0.06, 0.06, 0.06, 0.04, 0.04, 0.04, 0.02]; XF=[1, 1, 1, 1, 1, 1, 0, 0]
        SoilWater: SummerCona=2; SummerU=4; SummerDate=1-Nov; WinterCona=2; WinterU=4; WinterDate=1-Apr; DiffusConst=88; DiffusSlope=35; Salb=0.13; CN2Bare=70; CNRed=20; CNCov=0.8; Thickness=[100, 100, 200, 200, 200, 200, 200, 300]; SWCON=[0.7, 0.7, 0.7, 0.7, 0.7, 0.7, 0.5, 0.5]
        SoilOrganicMatter: RootCN=40; RootWt=1000; SoilCN=13.8; EnrACoeff=7.4; EnrBCoeff=0.2; OCUnits=Total
          Thickness  OC    FBiom  FInert
          100        0.47  0.04   0.5
          100        0.37  0.02   0.6
          200        0.28  0.02   0.8
          200        0.23  0.02   1
          200        0.22  0.01   1
          200        0.2   0.01   1
          200        0.2   0.01   1
          300        0.2   0.01   1
        Analysis: PHUnits=Water; BoronUnits=HotWater
          Thickness  Texture     EC   PH   Boron  ParticleSizeSand  ParticleSizeSilt  ParticleSizeClay
          100        Sandy loam  0.1  7.1  1.5    82.7              5.5               10.6
          100        Sandy loam  0.1  7.8  1.1    76.9              5.9               15.2
          200        Sandy loam  0.1  8.1  1.1    72.4              5.9               17.7
          200        Sandy loam  0.1  8.2  1.4    63.9              4.7               21.9
          200        Sandy loam  0.2  8.4  4.4    58.1              4.1               24.2
          200        Sandy loam  0.4  8.5  8.9    59.6              4.1               22.1
          200        -           -    8.5  -      -                 -                 -
          300        -           -    8.5  -      -                 -                 -
        Sample Initial Conditions: SW=[0.105, 0.149, 0.225, 0.257, 0.255, 0.255, 0.255]; NO3Units=kgha; NH4Units=kgha; SWUnits=Volumetric; OCUnits=Total; PHUnits=Water
          Thickness  NO3      NH4
          100        21       0
          100        16.3333  0
          200        5.83333  0
          200        3.5      0
          200        3.5      0
          200        2.33333  0
          200        0        0
          300        0        0
        InitialWater: FractionFull=1; PercentMethod=FilledFromTop
      Soil Vertosol No2 (PAWC-269 No514-Generic): ASCOrder=Vertosol; SoilType=Clay; Site=Generic-Qld; State=Generic; Country=Australia; NaturalVegetation=NA; ApsoilNumber=514-GENERIC; Latitude=-27.183286; Longitude=151.263748; LocationAccuracy=Regional Soil Type; YearOfSampling=0; DataSource=Generic soil. CSIRO Sustainable Ecosystems, Toowoomba
        Comments=Generic soil developed by Allan Peake. 'Typical Vertosol' soil properties have been calculated as the average of vertosols with similar characteristics from within the Apsoil database. Groupings were made on the basis of bulk density. Measured BD, DUL and CLL for the groups were then averaged to derive the characteristics of the typical Vertosols. They can then be used in conjunction with measured soil water to simplify the selection of appropriate Vertosols, for paddocks where full soil characterisations have not yet been completed. For more information see Peake et al. 2010: ‘A rapid method for estimating the plant available water capacity of Vertosols’, 2010 Australian Agronomy Conference. Typical Vertosols are different to 'Generic' soil types elsewhere in the Apsoil database, which are representative of certain soil types and districts, but have not been calculated from large numbers of similar, characterised soils.
        Water
          Thickness  BD    AirDry  LL15   DUL    SAT
          150        1.06  0.13    0.259  0.519  0.569
          150        1.09  0.217   0.271  0.508  0.558
          300        1.11  0.295   0.295  0.501  0.551
          300        1.13  0.295   0.295  0.494  0.544
          300        1.18  0.295   0.295  0.474  0.524
          300        1.23  0.295   0.295  0.457  0.507
          300        1.25  0.295   0.295  0.45   0.5
          BD source: Calculated from gravimetric moisture when profile wet but drained
          AirDry, LL15 source: Estimated based on local knowledge
          DUL source: FM & E
          SAT source: Calculated from measured, estimated or calculated BD
          SoilCrop wheat: LL=[0.259, 0.271, 0.295, 0.31, 0.34, 0.368, 0.414]; KL=[0.06, 0.06, 0.06, 0.04, 0.04, 0.02, 0.02]; XF=[1, 1, 1, 1, 1, 1, 1]
            LL source: Field measured and checked for sensibility
          SoilCrop lentil: same as Blank Simulation.paddock.Vertosol No2 (PAWC-269 No514-Generic).Water.wheat
          SoilCrop cotton: LL=[0.259, 0.271, 0.295, 0.31, 0.34, 0.368, 0.414]; KL=[0.1, 0.1, 0.1, 0.1, 0.09, 0.07, 0.05]; XF=[1, 1, 1, 1, 1, 1, 1]
            LL source: Field measured and checked for sensibility
          SoilCrop sorghum: LL=[0.259, 0.271, 0.295, 0.31, 0.34, 0.368, 0.414]; KL=[0.07, 0.07, 0.07, 0.05, 0.05, 0.04, 0.03]; XF=[1, 1, 1, 1, 1, 1, 1]
            LL source: Field measured and checked for sensibility
        SoilWater: same as Blank Simulation.paddock.Vertosol No7 (PAWC-204 No519-Generic).SoilWater
        SoilOrganicMatter: RootCN=40; RootWt=1000; SoilCN=12; EnrACoeff=7.4; EnrBCoeff=0.2; OCUnits=WalkleyBlack
          Thickness  OC     FBiom  FInert
          150        1.1    0.04   0.4
          150        0.88   0.02   0.6
          300        0.55   0.02   0.8
          300        0.275  0.02   1
          300        0.165  0.01   1
          300        0.11   0.01   1
          300        0.11   0.01   1
          OC source: Estimated based on local knowledge
        Analysis: Thickness=[150, 150, 300, 300, 300, 300, 300]; PH=[7.3, 7.7, 8.1, 8.5, 8.5, 8.6, 8.6]; PHUnits=Water; BoronUnits=HotWater
          PH source: Measured
        Sample Initial Conditions: NO3Units=kgha; NH4Units=kgha; SWUnits=Volumetric; OCUnits=Total; PHUnits=Water
          Thickness  NO3  NH4  SW
          150        42   0    0.519
          150        14   0    0.508
          300        7    0    0.501
          300        7    0    0.415
          300        0    0    0.295
          300        0    0    0.295
          300        0    0    0.295
        InitialWater: FractionFull=1; PercentMethod=FilledFromTop
      Soil Vertosol No11 (PAWC-136 No523-Generic): ASCOrder=Vertosol; SoilType=Clay; Site=Generic-Qld; State=Generic; Country=Australia; NaturalVegetation=NA; ApsoilNumber=523-GENERIC; Latitude=-27.183286; Longitude=151.263748; LocationAccuracy=Regional Soil Type; YearOfSampling=0; DataSource=Generic soil. CSIRO Sustainable Ecosystems, Toowoomba
        Comments=Generic soil developed by Allan Peake. 'Typical Vertosol' soil properties have been calculated as the average of vertosols with similar characteristics from within the Apsoil database. Groupings were made on the basis of bulk density. Measured BD, DUL and CLL for the groups were then averaged to derive the characteristics of the typical Vertosols. They can then be used in conjunction with measured soil water to simplify the selection of appropriate Vertosols, for paddocks where full soil characterisations have not yet been completed. For more information see Peake et al. 2010: ‘A rapid method for estimating the plant available water capacity of Vertosols’, 2010 Australian Agronomy Conference. Typical Vertosols are different to 'Generic' soil types elsewhere in the Apsoil database, which are representative of certain soil types and districts, but have not been calculated from large numbers of similar, characterised soils.
        Water
          Thickness  BD    AirDry  LL15   DUL    SAT
          150        1.59  0.089   0.177  0.32   0.37
          150        1.62  0.14    0.175  0.308  0.358
          300        1.59  0.19    0.19   0.321  0.371
          300        1.58  0.19    0.19   0.322  0.372
          300        1.61  0.19    0.19   0.312  0.362
          300        1.64  0.19    0.19   0.301  0.351
          300        1.7   0.19    0.19   0.28   0.329
          BD source: Calculated from gravimetric moisture when profile wet but drained
          AirDry, LL15 source: Estimated based on local knowledge
          DUL source: FM & E
          SAT source: Calculated from measured, estimated or calculated BD
          SoilCrop wheat: LL=[0.177, 0.175, 0.19, 0.22, 0.251, 0.278, 0.28]; KL=[0.06, 0.06, 0.06, 0.04, 0.04, 0.02, 0.02]; XF=[1, 1, 1, 1, 1, 1, 1]
            LL source: Field measured and checked for sensibility
          SoilCrop lentil: same as Blank Simulation.paddock.Vertosol No11 (PAWC-136 No523-Generic).Water.wheat
          SoilCrop cotton: LL=[0.177, 0.175, 0.19, 0.22, 0.251, 0.278, 0.28]; KL=[0.1, 0.1, 0.1, 0.1, 0.09, 0.07, 0.05]; XF=[1, 1, 1, 1, 1, 1, 1]
            LL source: Field measured and checked for sensibility
          SoilCrop sorghum: LL=[0.177, 0.175, 0.19, 0.22, 0.251, 0.278, 0.28]; KL=[0.07, 0.07, 0.07, 0.05, 0.05, 0.04, 0.03]; XF=[1, 1, 1, 1, 1, 1, 1]
            LL source: Field measured and checked for sensibility
        SoilWater: SummerCona=3.5; SummerU=6; SummerDate=1-Nov; WinterCona=2.5; WinterU=4; WinterDate=1-Apr; DiffusConst=40; DiffusSlope=16; Salb=0.13; CN2Bare=73; CNRed=20; CNCov=0.8; Thickness=[150, 150, 300, 300, 300, 300, 300]; SWCON=[0.3, 0.3, 0.3, 0.3, 0.3, 0.3, 0.3]
        SoilOrganicMatter: RootCN=40; RootWt=1000; SoilCN=12; EnrACoeff=7.4; EnrBCoeff=0.2; OCUnits=WalkleyBlack
          Thickness  OC     FBiom  FInert
          150        0.9    0.04   0.4
          150        0.72   0.02   0.6
          300        0.45   0.02   0.8
          300        0.225  0.02   1
          300        0.135  0.01   1
          300        0.09   0.01   1
          300        0.09   0.01   1
          OC source: Estimated based on local knowledge
        Analysis: Thickness=[150, 150, 300, 300, 300, 300, 300]; PH=[8.1, 8.7, 8.9, 8, 7, 6.4, 5.8]; PHUnits=Water; BoronUnits=HotWater
          PH source: Estimated based on local knowledge
        Sample Initial Conditions: NO3Units=kgha; NH4Units=kgha; SWUnits=Volumetric; OCUnits=Total; PHUnits=Water
          Thickness  NO3  NH4  SW
          150        21   0    0.199
          150        7    0    0.282
          300        3.5  0    0.304
          300        3.5  0    0.303
          300        0    0    0.297
          300        0    0    0.297
          300        0    0    0.297
        InitialWater: FractionFull=1; PercentMethod=FilledFromTop
      Soil Vertosol No11 (PAWC-136 No523-Generic)1: ASCOrder=Vertosol; SoilType=Clay; Site=Generic-Qld; State=Generic; Country=Australia; NaturalVegetation=NA; ApsoilNumber=523-GENERIC; Latitude=-27.183286; Longitude=151.263748; LocationAccuracy=Regional Soil Type; YearOfSampling=0; DataSource=Generic soil. CSIRO Sustainable Ecosystems, Toowoomba
        Comments=Generic soil developed by Allan Peake. 'Typical Vertosol' soil properties have been calculated as the average of vertosols with similar characteristics from within the Apsoil database. Groupings were made on the basis of bulk density. Measured BD, DUL and CLL for the groups were then averaged to derive the characteristics of the typical Vertosols. They can then be used in conjunction with measured soil water to simplify the selection of appropriate Vertosols, for paddocks where full soil characterisations have not yet been completed. For more information see Peake et al. 2010: ‘A rapid method for estimating the plant available water capacity of Vertosols’, 2010 Australian Agronomy Conference. Typical Vertosols are different to 'Generic' soil types elsewhere in the Apsoil database, which are representative of certain soil types and districts, but have not been calculated from large numbers of similar, characterised soils.
        Water: same as Blank Simulation.paddock.Vertosol No11 (PAWC-136 No523-Generic).Water
        SoilWater: same as Blank Simulation.paddock.Vertosol No11 (PAWC-136 No523-Generic).SoilWater
        SoilOrganicMatter: same as Blank Simulation.paddock.Vertosol No11 (PAWC-136 No523-Generic).SoilOrganicMatter
        Analysis: same as Blank Simulation.paddock.Vertosol No11 (PAWC-136 No523-Generic).Analysis
        Sample Initial Conditions: NO3Units=kgha; NH4Units=kgha; SWUnits=Volumetric; OCUnits=Total; PHUnits=Water
          Thickness  NO3  NH4  SW
          150        21   0    0.199
          150        7    0    0.282
          300        3.5  0    0.304
          300        3.5  0    0.303
          300        0    0    0.297
          300        0    0    0.297
          300        0    0    0.297
        InitialWater: FractionFull=1; PercentMethod=FilledFromTop
