Simulations: Version=162
  Simulation Blank Simulation
    Weather: FileName=/Examples/MetFiles/Goond.met
    Clock: Start=1940-01-01; End=1989-12-31
    Summary summaryfile
    Zone paddock: Area=1; Slope=0; AspectAngle=0; Altitude=50
      Folder Manager folder
      Soil Vertosol No7 (PAWC-204 No519-Generic): ASCOrder=Vertosol; SoilType=Clay; Site=Generic-Qld; State=Generic; Country=Australia; NaturalVegetation=NA; ApsoilNumber=519-GENERIC; Latitude=-27.183286; Longitude=151.263748; LocationAccuracy=Regional Soil Type; DataSource=Generic soil. CSIRO Sustainable Ecosystems, Toowoomba
        Comments=Generic soil developed by Allan Peake. 'Typical Vertosol' soil properties have been calculated as the average of vertosols with similar characteristics from within the Apsoil database. Groupings were made on the basis of bulk density. Measured BD, DUL and CLL for the groups were then averaged to derive the characteristics of the typical Vertosols. They can then be used in conjunction with measured soil water to simplify the selection of appropriate Vertosols, for paddocks where full soil characterisations have not yet been completed. For more information see Peake et al. 2010: ‘A rapid method for estimating the plant available water capacity of Vertosols’, 2010 Australian Agronomy Conference. Typical Vertosols are different to 'Generic' soil types elsewhere in the Apsoil database, which are representative of certain soil types and districts, but have not been calculated from large numbers of similar, characterised soils.
        Physical
          Thickness  BD    AirDry  LL15   DUL    SAT
          150        1.33  0.109   0.217  0.418  0.468
          150        1.34  0.18    0.225  0.413  0.463
          300        1.34  0.244   0.244  0.414  0.464
          300        1.37  0.244   0.244  0.404  0.454
          300        1.41  0.244   0.244  0.39   0.44
          300        1.43  0.244   0.244  0.382  0.432
          300        1.44  0.244   0.244  0.377  0.427
          SoilCrop WheatSoil: LL=[0.217, 0.225, 0.244, 0.262, 0.294, 0.324, 0.356]; KL=[0.06, 0.06, 0.06, 0.04, 0.04, 0.02, 0.02]; XF=[1, 1, 1, 1, 1, 1, 1]
            LL source: Field measured and checked for sensibility
          SoilCrop LentilSoil: same as Blank Simulation.paddock.Vertosol No7 (PAWC-204 No519-Generic).Physical.WheatSoil
          SoilCrop CottonSoil: LL=[0.217, 0.225, 0.244, 0.262, 0.294, 0.324, 0.356]; KL=[0.1, 0.1, 0.1, 0.1, 0.09, 0.07, 0.05]; XF=[1, 1, 1, 1, 1, 1, 1]
            LL source: Field measured and checked for sensibility
          SoilCrop SorghumSoil: LL=[0.217, 0.225, 0.244, 0.262, 0.294, 0.324, 0.356]; KL=[0.07, 0.07, 0.07, 0.05, 0.05, 0.04, 0.03]; XF=[1, 1, 1, 1, 1, 1, 1]
            LL source: Field measured and checked for sensibility
        WaterBalance SoilWater: SummerDate=1-Nov; SummerU=6; SummerCona=3.5; WinterDate=1-Apr; WinterU=4; WinterCona=2.5; DiffusConst=40; DiffusSlope=16; Salb=0.12; CN2Bare=73; CNRed=20; CNCov=0.8; PSIDul=-100; Thickness=[150, 150, 300, 300, 300, 300, 300]; SWCON=[0.3, 0.3, 0.3, 0.3, 0.3, 0.3, 0.3]
        CERESSoilTemperature Temperature
        Solute NO3: Thickness=[150, 150, 300, 300, 300, 300, 300]; InitialValues=[10.5263, 3.48259, 0.870647, 0.851582, 0, 0, 0]; InitialValuesUnits=ppm; WaterTableConcentration=0; D0=0; DepthConstant=0; MaxDepthSoluteAccessible=0; RunoffEffectivenessAtMovingSolute=0; MaxEffectiveRunoff=0
        Solute NH4: Thickness=[150, 150, 300, 300, 300, 300, 300]; InitialValues=[0, 0, 0, 0, 0, 0, 0]; InitialValuesUnits=ppm; WaterTableConcentration=0; D0=0; DepthConstant=0; MaxDepthSoluteAccessible=0; RunoffEffectivenessAtMovingSolute=0; MaxEffectiveRunoff=0
        Solute UREA: Thickness=[150, 150, 300, 300, 300, 300, 300]; InitialValues=[0, 0, 0, 0, 0, 0, 0]; InitialValuesUnits=kg/ha; WaterTableConcentration=0; D0=0; DepthConstant=0; MaxDepthSoluteAccessible=0; RunoffEffectivenessAtMovingSolute=0; MaxEffectiveRunoff=0
        Organic: FOMCNRatio=40; CarbonUnits=WalkleyBlack
          Thickness  Carbon  SoilCNRatio  FBiom  FInert  FOM
          150        1       12           0.04   0.4     347.129
          150        0.8     12           0.02   0.6     270.344
          300        0.5     12           0.02   0.8     163.972
          300        0.25    12           0.02   1       99.4541
          300        0.15    12           0.01   1       60.322
          300        0.1     12           0.01   1       36.5871
          300        0.1     12           0.01   1       22.1912
        Chemical: Thickness=[150, 150, 300, 300, 300, 300, 300]; PH=[8.4, 8.6, 8.6, 8, 7.1, 6.5, 6.5]; PHUnits=Water
          PH source: Measured
        Water: Thickness=[150, 150, 300, 300, 300, 300, 300]; InitialValues=[0.418, 0.413, 0.414, 0.404, 0.39, 0.382, 0.377]; InitialPAWmm=282.45; RelativeTo=LL15; FilledFromTop=true
        Nutrient
        Solute Urea: same as Blank Simulation.paddock.Vertosol No7 (PAWC-204 No519-Generic).UREA
      Soil Sandy Loam (Kerribee No359): ASCOrder=Calcarosol; SoilType=Sandy loam; Site=Kerribee; NearestTown=Paringi; Region=Lower Western; State=New South Wales; Country=Australia; NaturalVegetation=Belah and mallee; ApsoilNumber=359; Latitude=-34.288; Longitude=142.371; LocationAccuracy=+/- 20m
        DataSource=Based on Soil Characterisation undertaken by Whitbread/Davoren GRDC Soil water project and Jeff Baldock MSF data
        Physical
          Thickness  ParticleSizeClay  ParticleSizeSand  ParticleSizeSilt  BD     AirDry  LL15   DUL   SAT
          100        10.6              82.7              5.5               1.286  0.016   0.028  0.13  0.46
          100        15.2              76.9              5.9               1.529  0.048   0.065  0.17  0.37
          200        17.7              72.4              5.9               1.441  0.07    0.07   0.19  0.41
          200        21.9              63.9              4.7               1.486  0.1     0.1    0.22  0.39
          200        24.2              58.1              4.1               1.57   0.11    0.11   0.22  0.36
          200        22.1              59.6              4.1               1.626  0.11    0.11   0.21  0.32
          200        -                 -                 -                 1.626  0.1     0.1    0.19  0.32
          300        -                 -                 -                 1.626  0.14    0.14   0.19  0.32
          SoilCrop WheatSoil: LL=[0.028, 0.065, 0.1, 0.105, 0.11, 0.11, 0.11, 0.14]; KL=[0.06, 0.06, 0.06, 0.06, 0.04, 0.04, 0.04, 0.02]; XF=[1, 1, 1, 1, 1, 1, 1, 1]
          SoilCrop LentilSoil: LL=[0.028, 0.065, 0.1, 0.105, 0.11, 0.11, 0.11, 0.14]; KL=[0.06, 0.06, 0.06, 0.06, 0.04, 0.04, 0.04, 0.02]; XF=[1, 1, 1, 1, 1, 1, 1, 1]
          SoilCrop CanolaSoil: LL=[0.028, 0.065, 0.1, 0.115, 0.115, 0.13, 0.15, 0.14]; KL=[0.06, 0.06, 0.06, 0.06, 0.04, 0.04, 0.04, 0.02]; XF=[1, 1, 1, 1, 1, 1, 0, 0]
          SoilCrop FieldpeaSoil: LL=[0.028, 0.065, 0.1, 0.115, 0.115, 0.13, 0.15, 0.14]; KL=[0.06, 0.06, 0.06, 0.06, 0.04, 0.04, 0.04, 0.02]; XF=[1, 1, 1, 1, 1, 1, 0, 0]
          SoilCrop WeedSoil: LL=[0.05, 0.068, 0.09, 0.131, 0.139, 0.16, 0.16, 0.16]; KL=[0.06, 0.06, 0.06, 0.06, 0.04, 0.04, 0.04, 0.02]; XF=[1, 1, 1, 1, 1, 1, 0, 0]
        WaterBalance SoilWater: SummerDate=1-Nov; SummerU=4; SummerCona=2; WinterDate=1-Apr; WinterU=4; WinterCona=2; DiffusConst=88; DiffusSlope=35; Salb=0.13; CN2Bare=70; CNRed=20; CNCov=0.8; PSIDul=-100; Thickness=[100, 100, 200, 200, 200, 200, 200, 300]; SWCON=[0.7, 0.7, 0.7, 0.7, 0.7, 0.7, 0.5, 0.5]
        CERESSoilTemperature Temperature
        Solute NO3: Thickness=[100, 100, 200, 200, 200, 200, 200, 300]; InitialValuesUnits=ppm; WaterTableConcentration=0; D0=0; DepthConstant=0; MaxDepthSoluteAccessible=0; RunoffEffectivenessAtMovingSolute=0; MaxEffectiveRunoff=0
          InitialValues=[16.3297, 10.6824, 2.02406, 1.17766, 1.11465, 0.717507, 0, 0]
        Solute NH4: Thickness=[100, 100, 200, 200, 200, 200, 200, 300]; InitialValues=[0, 0, 0, 0, 0, 0, 0, 0]; InitialValuesUnits=ppm; WaterTableConcentration=0; D0=0; DepthConstant=0; MaxDepthSoluteAccessible=0; RunoffEffectivenessAtMovingSolute=0; MaxEffectiveRunoff=0
        Solute UREA: Thickness=[100, 100, 200, 200, 200, 200, 200, 300]; InitialValues=[0, 0, 0, 0, 0, 0, 0, 0]; InitialValuesUnits=kg/ha; WaterTableConcentration=0; D0=0; DepthConstant=0; MaxDepthSoluteAccessible=0; RunoffEffectivenessAtMovingSolute=0; MaxEffectiveRunoff=0
        Organic: FOMCNRatio=40; CarbonUnits=Total
          Thickness  Carbon  SoilCNRatio  FBiom  FInert  FOM
          100        0.47    13.8         0.04   0.5     301.302
          100        0.37    13.8         0.02   0.6     246.685
          200        0.28    13.8         0.02   0.8     165.358
          200        0.23    13.8         0.02   1       110.843
          200        0.22    13.8         0.01   1       74.3001
          200        0.2     13.8         0.01   1       49.8049
          200        0.2     13.8         0.01   1       33.3852
          300        0.2     13.8         0.01   1       18.3222
        Chemical: Thickness=[100, 100, 200, 200, 200, 200, 200, 300]; PH=[7.1, 7.8, 8.1, 8.2, 8.4, 8.5, 8.5, 8.5]; PHUnits=Water; EC=[0.1, 0.1, 0.1, 0.1, 0.2, 0.4]
        Water: Thickness=[100, 100, 200, 200, 200, 200, 200, 300]; InitialValues=[0.13, 0.17, 0.19, 0.22, 0.22, 0.21, 0.19, 0.19]; InitialPAWmm=143.7; RelativeTo=LL15; FilledFromTop=true
        Nutrient
        Solute Urea: same as Blank Simulation.paddock.Sandy Loam (Kerribee No359).UREA
      Soil Vertosol No2 (PAWC-269 No514-Generic): ASCOrder=Vertosol; SoilType=Clay; Site=Generic-Qld; State=Generic; Country=Australia; NaturalVegetation=NA; ApsoilNumber=514-GENERIC; Latitude=-27.183286; Longitude=151.263748; LocationAccuracy=Regional Soil Type; DataSource=Generic soil. CSIRO Sustainable Ecosystems, Toowoomba
        Comments=Generic soil developed by Allan Peake. 'Typical Vertosol' soil properties have been calculated as the average of vertosols with similar characteristics from within the Apsoil database. Groupings were made on the basis of bulk density. Measured BD, DUL and CLL for the groups were then averaged to derive the characteristics of the typical Vertosols. They can then be used in conjunction with measured soil water to simplify the selection of appropriate Vertosols, for paddocks where full soil characterisations have not yet been completed. For more information see Peake et al. 2010: ‘A rapid method for estimating the plant available water capacity of Vertosols’, 2010 Australian Agronomy Conference. Typical Vertosols are different to 'Generic' soil types elsewhere in the Apsoil database, which are representative of certain soil types and districts, but have not been calculated from large numbers of similar, characterised soils.
        Physical
          Thickness  BD    AirDry  LL15   DUL    SAT
          150        1.06  0.13    0.259  0.519  0.569
          150        1.09  0.217   0.271  0.508  0.558
          300        1.11  0.295   0.295  0.501  0.551
          300        1.13  0.295   0.295  0.494  0.544
          300        1.18  0.295   0.295  0.474  0.524
          300        1.23  0.295   0.295  0.457  0.507
          300        1.25  0.295   0.295  0.45   0.5
          SoilCrop WheatSoil: LL=[0.259, 0.271, 0.295, 0.31, 0.34, 0.368, 0.414]; KL=[0.06, 0.06, 0.06, 0.04, 0.04, 0.02, 0.02]; XF=[1, 1, 1, 1, 1, 1, 1]
            LL source: Field measured and checked for sensibility
          SoilCrop LentilSoil: same as Blank Simulation.paddock.Vertosol No2 (PAWC-269 No514-Generic).Physical.WheatSoil
          SoilCrop CottonSoil: LL=[0.259, 0.271, 0.295, 0.31, 0.34, 0.368, 0.414]; KL=[0.1, 0.1, 0.1, 0.1, 0.09, 0.07, 0.05]; XF=[1, 1, 1, 1, 1, 1, 1]
            LL source: Field measured and checked for sensibility
          SoilCrop SorghumSoil: LL=[0.259, 0.271, 0.295, 0.31, 0.34, 0.368, 0.414]; KL=[0.07, 0.07, 0.07, 0.05, 0.05, 0.04, 0.03]; XF=[1, 1, 1, 1, 1, 1, 1]
            LL source: Field measured and checked for sensibility
        WaterBalance SoilWater: same as Blank Simulation.paddock.Vertosol No7 (PAWC-204 No519-Generic).SoilWater
        CERESSoilTemperature Temperature
        Solute NO3: Thickness=[150, 150, 300, 300, 300, 300, 300]; InitialValues=[26.4151, 8.56269, 2.1021, 2.0649, 0, 0, 0]; InitialValuesUnits=ppm; WaterTableConcentration=0; D0=0; DepthConstant=0; MaxDepthSoluteAccessible=0; RunoffEffectivenessAtMovingSolute=0; MaxEffectiveRunoff=0
        Solute NH4: same as Blank Simulation.paddock.Vertosol No7 (PAWC-204 No519-Generic).NH4
        Solute UREA: same as Blank Simulation.paddock.Vertosol No7 (PAWC-204 No519-Generic).UREA
        Organic: FOMCNRatio=40; CarbonUnits=WalkleyBlack
          Thickness  Carbon  SoilCNRatio  FBiom  FInert  FOM
          150        1.1     12           0.04   0.4     347.129
          150        0.88    12           0.02   0.6     270.344
          300        0.55    12           0.02   0.8     163.972
          300        0.275   12           0.02   1       99.4541
          300        0.165   12           0.01   1       60.322
          300        0.11    12           0.01   1       36.5871
          300        0.11    12           0.01   1       22.1912
        Chemical: Thickness=[150, 150, 300, 300, 300, 300, 300]; PH=[7.3, 7.7, 8.1, 8.5, 8.5, 8.6, 8.6]; PHUnits=Water
          PH source: Measured
        Water: Thickness=[150, 150, 300, 300, 300, 300, 300]; InitialValues=[0.519, 0.508, 0.501, 0.494, 0.474, 0.457, 0.45]; InitialPAWmm=344.85; RelativeTo=LL15; FilledFromTop=true
        Nutrient
        Solute Urea: same as Blank Simulation.paddock.Vertosol No7 (PAWC-204 No519-Generic).UREA
      Soil Vertosol No11 (PAWC-136 No523-Generic): ASCOrder=Vertosol; SoilType=Clay; Site=Generic-Qld; State=Generic; Country=Australia; NaturalVegetation=NA; ApsoilNumber=523-GENERIC; Latitude=-27.183286; Longitude=151.263748; LocationAccuracy=Regional Soil Type; DataSource=Generic soil. CSIRO Sustainable Ecosystems, Toowoomba
        Comments=Generic soil developed by Allan Peake. 'Typical Vertosol' soil properties have been calculated as the average of vertosols with similar characteristics from within the Apsoil database. Groupings were made on the basis of bulk density. Measured BD, DUL and CLL for the groups were then averaged to derive the characteristics of the typical Vertosols. They can then be used in conjunction with measured soil water to simplify the selection of appropriate Vertosols, for paddocks where full soil characterisations have not yet been completed. For more information see Peake et al. 2010: ‘A rapid method for estimating the plant available water capacity of Vertosols’, 2010 Australian Agronomy Conference. Typical Vertosols are different to 'Generic' soil types elsewhere in the Apsoil database, which are representative of certain soil types and districts, but have not been calculated from large numbers of similar, characterised soils.
        Physical
          Thickness  BD    AirDry  LL15   DUL    SAT
          150        1.59  0.089   0.177  0.32   0.37
          150        1.62  0.14    0.175  0.308  0.358
          300        1.59  0.19    0.19   0.321  0.371
          300        1.58  0.19    0.19   0.322  0.372
          300        1.61  0.19    0.19   0.312  0.362
          300        1.64  0.19    0.19   0.301  0.351
          300        1.7   0.19    0.19   0.28   0.329
          SoilCrop WheatSoil: LL=[0.177, 0.175, 0.19, 0.22, 0.251, 0.278, 0.28]; KL=[0.06, 0.06, 0.06, 0.04, 0.04, 0.02, 0.02]; XF=[1, 1, 1, 1, 1, 1, 1]
            LL source: Field measured and checked for sensibility
          SoilCrop LentilSoil: same as Blank Simulation.paddock.Vertosol No11 (PAWC-136 No523-Generic).Physical.WheatSoil
          SoilCrop CottonSoil: LL=[0.177, 0.175, 0.19, 0.22, 0.251, 0.278, 0.28]; KL=[0.1, 0.1, 0.1, 0.1, 0.09, 0.07, 0.05]; XF=[1, 1, 1, 1, 1, 1, 1]
            LL source: Field measured and checked for sensibility
          SoilCrop SorghumSoil: LL=[0.177, 0.175, 0.19, 0.22, 0.251, 0.278, 0.28]; KL=[0.07, 0.07, 0.07, 0.05, 0.05, 0.04, 0.03]; XF=[1, 1, 1, 1, 1, 1, 1]
            LL source: Field measured and checked for sensibility
        WaterBalance SoilWater: SummerDate=1-Nov; SummerU=6; SummerCona=3.5; WinterDate=1-Apr; WinterU=4; WinterCona=2.5; DiffusConst=40; DiffusSlope=16; Salb=0.13; CN2Bare=73; CNRed=20; CNCov=0.8; PSIDul=-100; Thickness=[150, 150, 300, 300, 300, 300, 300]; SWCON=[0.3, 0.3, 0.3, 0.3, 0.3, 0.3, 0.3]
        CERESSoilTemperature Temperature
        Solute NO3: Thickness=[150, 150, 300, 300, 300, 300, 300]; InitialValues=[8.80503, 2.88066, 0.733753, 0.738397, 0, 0, 0]; InitialValuesUnits=ppm; WaterTableConcentration=0; D0=0; DepthConstant=0; MaxDepthSoluteAccessible=0; RunoffEffectivenessAtMovingSolute=0; MaxEffectiveRunoff=0
        Solute NH4: same as Blank Simulation.paddock.Vertosol No7 (PAWC-204 No519-Generic).NH4
        Solute UREA: same as Blank Simulation.paddock.Vertosol No7 (PAWC-204 No519-Generic).UREA
        Organic: FOMCNRatio=40; CarbonUnits=WalkleyBlack
          Thickness  Carbon  SoilCNRatio  FBiom  FInert  FOM
          150        0.9     12           0.04   0.4     347.129
          150        0.72    12           0.02   0.6     270.344
          300        0.45    12           0.02   0.8     163.972
          300        0.225   12           0.02   1       99.4541
          300        0.135   12           0.01   1       60.322
          300        0.09    12           0.01   1       36.5871
          300        0.09    12           0.01   1       22.1912
        Chemical: Thickness=[150, 150, 300, 300, 300, 300, 300]; PH=[8.1, 8.7, 8.9, 8, 7, 6.4, 5.8]; PHUnits=Water
          PH source: Estimated based on local knowledge
        Water: Thickness=[150, 150, 300, 300, 300, 300, 300]; InitialValues=[0.32, 0.308, 0.321, 0.322, 0.312, 0.301, 0.28]; InitialPAWmm=217.2; RelativeTo=LL15; FilledFromTop=true
        Nutrient
        Solute Urea: same as Blank Simulation.paddock.Vertosol No7 (PAWC-204 No519-Generic).UREA
      Soil Vertosol No11 (PAWC-136 No523-Generic)1: same as Blank Simulation.paddock.Vertosol No11 (PAWC-136 No523-Generic)
      MicroClimate: a_interception=0; b_interception=1; c_interception=0; d_interception=0; SoilHeatFluxFraction=0; MinimumHeightDiffForNewLayer=0; NightInterceptionFraction=0; ReferenceHeight=2
    SurfaceOrganicMatter: InitialResidueName=wheat_stubble; InitialResidueType=wheat; InitialResidueMass=0; InitialStandingFraction=0; InitialCPR=0; InitialCNR=80
    SoilArbitrator
  DataStore
