Simulations: Version=166
  DataStore
    ExcelInput: FileNames=[Lentil Observed.xlsx]; SheetNames=[ObservedHarvests, ObservedDaily]
    PredictedObserved HarvestObsPred: PredictedTableName=Harvests; ObservedTableName=ObservedHarvests; FieldNameUsedForMatch=SimulationName; AllColumns=false
  Folder Replacements
    Plant Lentil: PlantType=Lentil; IsEnding=false; DaysAfterEnding=0
      Memo Introduction
        The APSIM Chickpea model has been developed from the original APSIM Chickpea model described by [robertson_simulation_2002] using the Plant Modelling Framework of [brown_plant_2014].

        Note to users:
        Desi and Kabuli chickpea are two subspecies of chickpea. The variety set includes both types. As indicated by Peake et al., 2021 (GRDC Updates), there was less confidence in predicting
      OrganArbitrator Arbitrator
        BiomassTypeArbitrator DMArbitration
          Folder PotentialPartitioningMethods
            ReallocationMethod
            AllocateFixationMethod
            RetranslocationMethod
            SendPotentialDMAllocationsMethod
          Folder AllocationMethods
            NutrientConstrainedAllocationMethod
            DryMatterAllocationsMethod
          RelativeAllocation ArbitrationMethod
        BiomassTypeArbitrator NArbitration
          Folder PotentialPartitioningMethods
            ReallocationMethod
          Folder ActualPartitioningMethods
            AllocateFixationMethod
            RetranslocationMethod
          Folder AllocationMethods
            NitrogenAllocationsMethod
          RelativeAllocation ArbitrationMethod
          AllocateUptakesMethod
        WaterUptakeMethod
        NitrogenUptakeMethod
      Phenology
        PhaseLookup ThermalTime
          PhaseLookupValue PreEmergence: Start=Germination; End=Emergence
            SubDailyInterpolation ThermalTime: agregationMethod=0
              Memo
                The cardinal temperatures for calculating thermal time have been taken from [SINGH199641] as used by [robertson_simulation_2002].
              XYPairs Response: X=[0, 30, 40]; Y=[0, 30, 0]
              ThreeHourAirTemperature InterpolationMethod
          PhaseLookupValue Emerge_to_EndFlower: Start=Emergence; End=HarvestRipe
            SubDailyInterpolation ThermalTime: agregationMethod=0
              Memo
                The cardinal temperatures for calculating thermal time have been taken from [SINGH199641] as used by [robertson_simulation_2002].
              XYPairs Response: X=[0, 30, 40]; Y=[0, 30, 30]
              ThreeHourAirTemperature InterpolationMethod
        PhotoperiodFunction Photoperiod: Twilight=-6; DayLength=0
        GerminatingPhase Germinating: Start=Sowing; End=Germination; IsEmerged=false
        EmergingPhase Emerging: Start=Germination; End=Emergence; IsEmerged=true; TTForTimeStep=0
          Memo
            Shoot lag = constant
            Shoot rate = multiplier on sowing depth (mm)

            Note could be beneficial to set differently for large-seeded kabuli cultivars, which anecdotally seem to be slower emerging.
          VariableReference ThermalTime: VariableName=[Phenology].ThermalTime
          AddFunction Target
            Constant ShootLag: FixedValue=120
            MultiplyFunction DepthxRate
              VariableReference SowingDepth: VariableName=[Plant].SowingData.Depth
              Constant ShootRate: FixedValue=0.7
        GenericPhase Vegetative: Start=Emergence; End=EndJuvenille; IsEmerged=true
          Constant Target: FixedValue=400; Units=Degree Days
          VariableReference Progression: VariableName=[Phenology].ThermalTime
        GenericPhase FloralInitiation: Start=EndJuvenille; End=StartBudding; IsEmerged=true
          Memo
            This phase simulates the time between end of the Non-inductive phase of [robertson_simulation_2002] (515 TT) and the appearance of visible buds on petioles
          Constant Target: FixedValue=250; Units=thermal time
          VariableReference Progression: VariableName=[Phenology].ThermalTime
        GenericPhase Budding: Start=StartBudding; End=StartFlowering; IsEmerged=true
          Memo
            This phase encompasses the budding phase. All photoperiod response is currently contained here although in reality probably carries across LateVeg as well as this one
          VariableReference Progression: VariableName=[Phenology].ThermalTime
          LinearInterpolationFunction Target
            XYPairs: X=[10, 12.43, 17]; Y=[501.6, 50, 50]
            VariableReference XValue: VariableName=[Phenology].EndJuv_PhotoPeriod
        GenericPhase Flowering: Start=StartFlowering; End=EndFlowering; IsEmerged=true
          Memo
            Minimum thermal time target for duration of flowers prior to pod initiation.
          VariableReference Progression: VariableName=[Phenology].ThermalTime
          Constant Target: FixedValue=100
        GenericPhase PodInitiation: Start=EndFlowering; End=EndPodInitiation; IsEmerged=true
          Memo
             Requires 5 days of temp above 16 degrees (or ten days at 15 degrees) before 1cm pods are visible, due to sensitivity of pod initiation to mean daily temperature (see Srinivasan et al. 1998; Clarke and Siddique, 2004). These days may accumulate anytime after flowering begins (i.e. during previous growth stage as well as during the current one). so the 'EndFloweringPodStartTT' is subtracted from the 5 days target
          VariableReference Progression: VariableName=[Phenology].PodStartTT
          SubtractFunction Target
            Constant Total: FixedValue=5
            VariableReference EndFloweringPodStartTT: VariableName=[Phenology].EndFloweringPodStartTT
        GenericPhase EarlyGrainFilling: Start=EndPodInitiation; End=MidGrainFilling; IsEmerged=true
          Memo
            Function shortens the available TT for grainfilling when there is a big gap between beginning of flowering and beginning of pod initiaton

            Can't be less than zero for obvious reasons
          VariableReference Progression: VariableName=[Phenology].ThermalTime
          MaximumFunction Target
            SubtractFunction Reducer
              Constant Max: FixedValue=300
              DivideFunction Adjust
                VariableReference TotalPodInitTT: VariableName=[Phenology].TotalPodInitTT
                Constant Total: FixedValue=2
            Constant constant_zero: FixedValue=0
        GenericPhase MidGrainFilling: Start=MidGrainFilling; End=LateGrainFilling; IsEmerged=true
          VariableReference Progression: VariableName=[Phenology].ThermalTime
          Constant Target: FixedValue=250
        GenericPhase LateGrainFilling: Start=LateGrainFilling; End=EndGrainFill; IsEmerged=true
          VariableReference Progression: VariableName=[Phenology].ThermalTime
          Constant Target: FixedValue=250
        GenericPhase Maturing: Start=EndGrainFill; End=Maturity; IsEmerged=true
          Memo
            The duration of the Maturing phase has been taken from the model of [robertson_simulation_2002].
          Constant Target: FixedValue=60
          VariableReference Progression: VariableName=[Phenology].ThermalTime
        GenericPhase Ripening: Start=Maturity; End=HarvestRipe; IsEmerged=true
          Constant Target: FixedValue=60
          VariableReference Progression: VariableName=[Phenology].ThermalTime
        EndPhase ReadyForHarvesting: Start=HarvestRipe; End=Unused; IsEmerged=true
          VariableReference ThermalTime: VariableName=[Phenology].ThermalTime
        OnEventFunction BuddingDAS: SetEvent=StartBudding; ReSetEvent=never
          Memo
            A function is used to provide flowering date as days after sowing(DAS).
          Constant PreEventValue: FixedValue=0
          VariableReference PostEventValue: VariableName=[Plant].DaysAfterSowing
        OnEventFunction FloweringDAS: SetEvent=StartFlowering; ReSetEvent=never
          Memo
            A function is used to provide flowering date as days after sowing(DAS).
          Constant PreEventValue: FixedValue=0
          VariableReference PostEventValue: VariableName=[Plant].DaysAfterSowing
        OnEventFunction MaturityDAS: SetEvent=Maturity; ReSetEvent=never
          Memo
            A function is used to provide maturity date as days after sowing(DAS).
          Constant PreEventValue: FixedValue=0
          VariableReference PostEventValue: VariableName=[Plant].DaysAfterSowing
        OnEventFunction EmergenceDAS: SetEvent=Emergence; ReSetEvent=never
          Memo
            A function is used to provide maturity date as days after sowing(DAS).
          Constant PreEventValue: FixedValue=0
          VariableReference PostEventValue: VariableName=[Plant].DaysAfterSowing
        OnEventFunction EndBuddingMSLeafNo: SetEvent=EndBudding; ReSetEvent=never
          Memo
            A function is used to provide leaf number at end of flowering as a reference point for reducing maximum leaf size during grainfilling
          Constant PreEventValue: FixedValue=0
          VariableReference PostEventValue: VariableName=[Structure].LeafTipsAppeared
        OnEventFunction EndFloweringMSLeafNo: SetEvent=EndFlowering; ReSetEvent=never
          Memo
            A function is used to provide leaf number at end of flowering as a reference point for reducing maximum leaf size during grainfilling
          Constant PreEventValue: FixedValue=0
          VariableReference PostEventValue: VariableName=[Structure].LeafTipsAppeared
        DivideFunction MeanTemp
          AddFunction TempSum
            VariableReference MaxT: VariableName=[Weather].MaxT
            VariableReference MinT: VariableName=[Weather].MinT
          Constant Two: FixedValue=2
        AccumulateFunction RadDegDays: StartStageName=Emergence; EndStageName=EndGrainFill; FractionRemovedOnCut=0; FractionRemovedOnHarvest=0; FractionRemovedOnGraze=0; FractionRemovedOnPrune=0
          DivideFunction RDD
            VariableReference Rad: VariableName=[Weather].Radn
            VariableReference TT: VariableName=[Phenology].ThermalTime
        OnEventFunction StartBudSoilT: SetEvent=StartBudding; ReSetEvent=never
          Constant PreEventValue: FixedValue=0
          VariableReference PostEventValue: VariableName=[Soil].Temperature.Value[1]
        OnEventFunction StartBudding_PhotoPeriod: SetEvent=StartBudding; ReSetEvent=never
          Constant PreEventValue: FixedValue=15
          VariableReference PostEventValue: VariableName=[Phenology].Photoperiod.DayLength
        OnEventFunction PoddingDAS: SetEvent=EndPodInitiation; ReSetEvent=never
          Memo
            A function is used to provide podding date as days after sowing(DAS).
          Constant PreEventValue: FixedValue=0
          VariableReference PostEventValue: VariableName=[Plant].DaysAfterSowing
        OnEventFunction EndJuv_PhotoPeriod: SetEvent=EndJuvenille; ReSetEvent=never
          Constant PreEventValue: FixedValue=12
          VariableReference PostEventValue: VariableName=[Phenology].Photoperiod.DayLength
        PhaseLookup PodStartTT
          PhaseLookupValue PreFlower: Start=Germination; End=StartFlowering
            Constant PodStartTT: FixedValue=0
          PhaseLookupValue PostFlower: Start=StartFlowering; End=HarvestRipe
            LinearInterpolationFunction PodStartTT
              XYPairs: X=[0, 14, 16]; Y=[0, 0, 1]
              VariableReference XValue: VariableName=[Phenology].MeanTemp
        PhaseLookup AccumPodStartTT
          PhaseLookupValue PreFlowering: Start=Germination; End=StartFlowering
            Constant PodStartTT: FixedValue=0
          PhaseLookupValue FloweringtoMaturity: Start=StartFlowering; End=HarvestRipe
            AccumulateFunction PodStartTTsum: StartStageName=StartFlowering; EndStageName=Maturity; FractionRemovedOnCut=0; FractionRemovedOnHarvest=0; FractionRemovedOnGraze=0; FractionRemovedOnPrune=0
              LinearInterpolationFunction PodStartTT
                XYPairs: X=[0, 14, 16]; Y=[0, 0, 1]
                VariableReference XValue: VariableName=[Phenology].MeanTemp
        OnEventFunction StartPodInitTT: SetEvent=EndFlowering
          Constant PreEventValue: FixedValue=0
          VariableReference PostEventValue: VariableName=[Phenology].AccumulatedTT
        OnEventFunction EndPodInitTT: SetEvent=EndPodInitiation
          Constant PreEventValue: FixedValue=0
          VariableReference PostEventValue: VariableName=[Phenology].AccumulatedTT
        OnEventFunction StartFloweringPodStartTT: SetEvent=StartFlowering
          Constant PreEventValue: FixedValue=0
          VariableReference PostEventValue: VariableName=[Phenology].AccumPodStartTT
        OnEventFunction EndFloweringPodStartTT: SetEvent=EndFlowering
          Constant PreEventValue: FixedValue=0
          VariableReference PostEventValue: VariableName=[Phenology].AccumPodStartTT
        SubtractFunction TotalPodInitTT
          Memo
            Shortens TT for grainfilling when there is a big gap between beginning of flowering and beginning of pod initiaton
          VariableReference EndPodInitTT: VariableName=[Phenology].EndPodInitTT
          VariableReference StartPodInitTT: VariableName=[Phenology].StartPodInitTT
        OnEventFunction EndFloweringNodeLeafArea: SetEvent=EndFlowering; ReSetEvent=never
          Memo
            A function is used to provide leaf number at end of flowering as a reference point for reducing maximum leaf size during grainfilling
          Constant PreEventValue: FixedValue=1
          VariableReference PostEventValue
            VariableName=[Leaf].LeafCohortParameters.MaxArea.Vegetative_to_Flowering.MaxArea
        SubtractFunction PostFloweringMSLeafNo
          Memo
            Shortens TT for grainfilling when there is a big gap between beginning of flowering and beginning of pod initiaton
          VariableReference MSLeafNo: VariableName=[Structure].LeafTipsAppeared
          VariableReference EndFloweringMSL: VariableName=[Phenology].EndFloweringMSLeafNo
      Structure: CohortInitialisationStage=Germination; LeafInitialisationStage=Emergence
        VariableReference ThermalTime: VariableName=[Phenology].ThermalTime
        Constant DroughtInducedBranchMortality: FixedValue=0
        Constant FinalLeafNumber: FixedValue=40
        LinearInterpolationFunction HeightModel
          XYPairs: X=[0, 50, 300]; Y=[10, 200, 750]
          VariableReference XValue: VariableName=[Stem].Wt
        MultiplyFunction BranchingRate
          Memo
            Cover response as per soybean
          PhaseLookup Potential_Branching_Rate
            PhaseLookupValue PreEmergence: Start=Germination; End=Emergence
              Constant Function: FixedValue=0
            PhaseLookupValue Vegetative: Start=Emergence; End=EndPodInitiation
              LinearInterpolationFunction MaxBranchRate
                Memo
                  [robertson_simulation_2002] used a maximum leaf size of 300 mm2 for the first 9 leaves and 600 mm2 thereafter.
                XYPairs: X=[0, 1, 2, 3, 4, 5, 12, 13, 20, 21]; Y=[0, 2, 2, 1, 1, 1, 1, 1, 1, 1]
                VariableReference XValue: VariableName=[Structure].LeafTipsAppeared
            PhaseLookupValue PostFlowering: Start=EndPodInitiation; End=Maturity
              Constant Function: FixedValue=0
          PhaseLookup BranchModifier
            PhaseLookupValue EarlyVegetative: Start=Emergence; End=StartBudding
              MinimumFunction EarlyVeg
                LinearInterpolationFunction Cover_response
                  XYPairs: X=[0, 0.2, 0.4, 0.5, 0.7, 0.8, 0.9]; Y=[1, 1, 1, 1, 0.2, 0, 0]
                  VariableReference XValue: VariableName=[leaf].CoverGreen
                LinearInterpolationFunction WaterStress
                  XYPairs: X=[0, 0.2, 0.4, 0.7, 0.8, 1]; Y=[0, 0, 0, 0, 0.4, 1]
                  VariableReference XValue: VariableName=[leaf].Fw
                LinearInterpolationFunction TempResponse
                  XYPairs: X=[4, 6, 9, 10, 30, 35]; Y=[0, 0.5, 1, 1, 1, 0]
                  VariableReference XValue: VariableName=[Weather].MeanT
            PhaseLookupValue FloralInitiation: Start=StartBudding; End=StartFlowering
              MinimumFunction LateVeg
                LinearInterpolationFunction WaterStress
                  XYPairs: X=[0, 0.2, 0.4, 0.7, 0.8, 1]; Y=[0, 0, 0, 0, 0.4, 1]
                  VariableReference XValue: VariableName=[leaf].Fw
                LinearInterpolationFunction TempResponse
                  XYPairs: X=[4, 6, 9, 10, 30, 35]; Y=[0, 0.5, 1, 1, 1, 0]
                  VariableReference XValue: VariableName=[Weather].MeanT
            PhaseLookupValue Flowering: Start=StartFlowering; End=EndPodInitiation
              MinimumFunction FlowerResponse: same as Replacements.Lentil.Structure.BranchingRate.BranchModifier.FloralInitiation.LateVeg
            PhaseLookupValue EarlyGrainfilling: Start=EndPodInitiation; End=MidGrainFilling
              Constant Fraction: FixedValue=0
            PhaseLookupValue MidGrainfilling: Start=MidGrainFilling; End=LateGrainFilling
              Constant Fraction: FixedValue=0
            PhaseLookupValue LateGrainfilling: Start=LateGrainFilling; End=EndGrainFill
              Constant Fraction: FixedValue=0
        Constant BranchMortality: FixedValue=0
        PhaseLookup Phyllochron
          Memo
            Water stress impacts on phyllocron during grainfilling as per Peake et al. 2020. May impact on earlier growth stages so other stages made available for modification in future.
          PhaseLookupValue PreEmergence: Start=Germination; End=Emergence
            Constant Function: FixedValue=0
          PhaseLookupValue CanopyDevelopment: Start=Emergence; End=EndFlowering
            VariableReference NodeAppearanceRate: VariableName=[Structure].NodeAppearanceRate
          PhaseLookupValue EarlyGrainfilling: Start=EndFlowering; End=MidGrainFilling
            DivideFunction
              VariableReference NodeAppearanceRate: VariableName=[Structure].NodeAppearanceRate
              LinearInterpolationFunction WaterStress
                XYPairs: X=[0, 0.2, 0.4, 0.6, 0.8, 1]; Y=[0, 0, 0.15, 0.5, 0.95, 1]
                VariableReference XValue: VariableName=[leaf].Fw
          PhaseLookupValue MidGrainfilling: Start=MidGrainFilling; End=LateGrainFilling
            DivideFunction: same as Replacements.Lentil.Structure.Phyllochron.EarlyGrainfilling.DivideFunction
          PhaseLookupValue LateGrainfilling: Start=LateGrainFilling; End=EndGrainFill
            DivideFunction: same as Replacements.Lentil.Structure.Phyllochron.EarlyGrainfilling.DivideFunction
        LinearInterpolationFunction NodeAppearanceRate
          XYPairs: X=[1, 2, 3, 4, 30]; Y=[20, 20, 20, 50, 50]
          Memo
            One node every 20 Degree Days for first 3 nodes. After this then reverts to 50 Degree Days for each subsequent node

            Operating during both vegetative and flowering phases.
          VariableReference XValue: VariableName=[Structure].LeafTipsAppeared
        Constant StemSenescenceAge: FixedValue=0
        DivideFunction LAIperBranch
          VariableReference LAI: VariableName=[Leaf].LAI
          VariableReference Branches: VariableName=[Structure].BranchNumber
        DivideFunction PhotoSynthPerBranch
          VariableReference Photosynthesis: VariableName=[Leaf].Photosynthesis
          VariableReference Branches: VariableName=[Structure].TotalStemPopn
        LinearInterpolationFunction EVCover_response: same as Replacements.Lentil.Structure.BranchingRate.BranchModifier.EarlyVegetative.EarlyVeg.Cover_response
        LinearInterpolationFunction FICover_response: same as Replacements.Lentil.Structure.BranchingRate.BranchModifier.EarlyVegetative.EarlyVeg.Cover_response
        LinearInterpolationFunction EVWaterStress
          XYPairs: X=[0, 0.2, 0.4, 0.7, 0.8, 1]; Y=[0, 0, 0, 0, 0.4, 1]
          VariableReference XValue: VariableName=[leaf].Fw
        LinearInterpolationFunction FIWaterStress
          XYPairs: X=[0, 0.2, 0.4, 0.7, 0.8, 1]; Y=[0, 0, 0, 0, 0.4, 1]
          VariableReference XValue: VariableName=[leaf].Fw
        LinearInterpolationFunction EVTempResponse
          XYPairs: X=[4, 6, 9, 10, 30, 35]; Y=[0, 0.5, 1, 1, 1, 0]
          VariableReference XValue: VariableName=[Weather].MeanT
        LinearInterpolationFunction FITempResponse
          XYPairs: X=[4, 6, 9, 10, 30, 35]; Y=[0, 0.5, 1, 1, 1, 0]
          VariableReference XValue: VariableName=[Weather].MeanT
      ReproductiveOrgan Grain: GrowthRespiration=0; MaintenanceRespiration=0
        Biomass Live
        Biomass Dead
        Constant PotentialHarvestIndex: FixedValue=0.5
        AddFunction FillingDuration
          VariableReference EarlyGrainFillingDuration: VariableName=[Phenology].EarlyGrainFilling.Target
          VariableReference MidGrainFillingDuration: VariableName=[Phenology].MidGrainFilling.Target
          VariableReference LateGrainFillingDuration: VariableName=[Phenology].LateGrainFilling.Target
        Constant MaximumPotentialGrainSize: FixedValue=0.25
        PhaseLookup DMDemandFunction
          PhaseLookupValue GrainFilling: Start=EndPodInitiation; End=HarvestRipe
            MultiplyFunction HIGrainDemand
              VariableReference AboveGroundWt: VariableName=[AboveGround].Wt
              DivideFunction HarvestIndexIncrease
                VariableReference PotentialHarvestIndex: VariableName=[Grain].PotentialHarvestIndex
                VariableReference FillingDuration: VariableName=[Grain].FillingDuration
              VariableReference ThermalTime: VariableName=[Phenology].ThermalTime
        Constant MinimumNConc: FixedValue=0.02
        Constant MaximumNConc: FixedValue=0.04
        Constant WaterContent: FixedValue=0.12
        MultiplyFunction NumberFunction
          Constant PeasPerPod: FixedValue=1
          VariableReference PodNumber: VariableName=[Shell].PodNumber
        BiomassRemoval BiomassRemovalDefaults: HarvestFractionLiveToRemove=1; HarvestFractionDeadToRemove=0; HarvestFractionLiveToResidue=0; HarvestFractionDeadToResidue=0
        Constant DMConversionEfficiency: FixedValue=0.89
        Constant RemobilisationCost: FixedValue=0
        MultiplyFunction NFillingRate
          VariableReference NConc: VariableName=[Grain].MaximumNConc
          VariableReference DMDemand: VariableName=[Grain].DMDemandFunction
          VariableReference DMConversionEfficiency: VariableName=[Grain].DMConversionEfficiency
        Constant CarbonConcentration: FixedValue=0.4
        DivideFunction HarvestIndex
          VariableReference GrainWt: VariableName=[Grain].Wt
          VariableReference AboveGroundWt: VariableName=[AboveGround].Wt
        VariableReference AboveGroundWt: VariableName=[AboveGround].Wt
        NutrientPoolFunctions DMDemandPriorityFactors
          Constant Structural: FixedValue=1
          Constant Metabolic: FixedValue=1
          Constant Storage: FixedValue=1
        NutrientPoolFunctions NDemandPriorityFactors: same as Replacements.Lentil.Grain.DMDemandPriorityFactors
      Root: GrowthRespiration=0; MaintenanceRespiration=0
        Memo
          Minimal root biomass has been simulated. It appears to interfere with simulation of stem biomass (arbitrator).
        RootShapeCylinder RootShape
        PhaseLookup KLModifier
          PhaseLookupValue PreEmergence: Start=Germination; End=Emergence
            Constant Function: FixedValue=0.1
          PhaseLookupValue PreCanopyDevelopment: Start=Emergence; End=EndFlowering
            VariableReference klTTfactor1: VariableName=[Root].klComboeffects
          PhaseLookupValue PostCanopyDevelopment: Start=EndFlowering; End=Maturity
            Memo
              Soil data at Kulai and ICRISAT suggests wider row spacing and late sowing can catch up with kl - so allow the function to continue post flowering
            VariableReference klTTfactor1: VariableName=[Root].klComboeffects
        Constant MaxDailyNUptake: FixedValue=6
        Constant SenescenceRate: FixedValue=0.005
        Constant MaximumRootDepth: FixedValue=1000000
        PhaseLookup RootFrontVelocity
          PhaseLookupValue PreEmergence: Start=Germination; End=Emergence
            Constant Function: FixedValue=3
          PhaseLookupValue early: Start=Emergence; End=StartFlowering
            Constant Function: FixedValue=15
          PhaseLookupValue late: Start=StartFlowering; End=Maturity
            Constant Function: FixedValue=17
        Constant MaximumNConc: FixedValue=0.01
        Constant MinimumNConc: FixedValue=0.005
        PhaseLookupValue NitrogenDemandSwitch: Start=Emergence; End=EndGrainFill
          Constant: FixedValue=1
        BiomassRemoval BiomassRemovalDefaults: HarvestFractionLiveToRemove=0; HarvestFractionDeadToRemove=0; HarvestFractionLiveToResidue=0.2; HarvestFractionDeadToResidue=0
        Constant KNO3: FixedValue=0.02
        Constant KNH4: FixedValue=0
        LinearInterpolationFunction NUptakeSWFactor
          XYPairs: X=[0, 1]; Y=[0, 1]
          VariableReference XValue: VariableName=[Root].RWC
        Constant SpecificRootLength: FixedValue=40; Units=m/g
        Constant DMConversionEfficiency: FixedValue=1
        Constant MaintenanceRespirationFunction: FixedValue=1
        Constant RemobilisationCost: FixedValue=0
        Constant CarbonConcentration: FixedValue=0.4
        NutrientDemandFunctions DMDemands
          MultiplyFunction Structural
            PartitionFractionDemandFunction DMDemandFunction
              PhaseLookup PartitionFraction
                PhaseLookupValue Early: Start=Emergence; End=StartFlowering
                  Constant Function: FixedValue=0.2
                PhaseLookupValue Middle: Start=StartBudding; End=StartFlowering
                  Constant Function: FixedValue=0.2
                PhaseLookupValue Late: Start=StartFlowering; End=Maturity
                  Constant Function: FixedValue=0
            Constant StructuralFraction: FixedValue=1
          Constant Metabolic: FixedValue=0
          StorageDMDemandFunction Storage
            SubtractFunction StorageFraction
              Constant One: FixedValue=1
              VariableReference StructuralFraction: VariableName=[Root].DMDemands.Structural.StructuralFraction
          Constant QStructuralPriority: FixedValue=1
          Constant QMetabolicPriority: FixedValue=1
          Constant QStoragePriority: FixedValue=1
        NutrientDemandFunctions NDemands
          MultiplyFunction Structural
            VariableReference MinNconc: VariableName=[Root].minimumNconc
            VariableReference PotentialDMAllocation: VariableName=[Root].potentialDMAllocation.Structural
          MultiplyFunction Metabolic
            SubtractFunction MetabolicNconc
              VariableReference CritNconc: VariableName=[Root].criticalNConc
              VariableReference MinNconc: VariableName=[Root].minimumNconc
            VariableReference PotentialDMAllocation: VariableName=[Root].potentialDMAllocation.Structural
          StorageNDemandFunction Storage
            VariableReference NitrogenDemandSwitch: VariableName=[Root].nitrogenDemandSwitch
            VariableReference MaxNconc: VariableName=[Root].maximumNconc
          Constant QStructuralPriority: FixedValue=1
          Constant QMetabolicPriority: FixedValue=1
          Constant QStoragePriority: FixedValue=1
        DivideFunction SurfaceWaterAvailability
          VariableReference PAW: VariableName=[Soil].SoilWater.PAWmm[1]
          VariableReference PAWC: VariableName=[Soil].Physical.PAWCmm[1]
        DivideFunction WithinRowSpaceFactor
          Constant: FixedValue=1000; Units=mm per 1m of row
          VariableReference RowSpacing: VariableName=[Lentil].SowingData.RowSpacing
          VariableReference Population: VariableName=[Lentil].SowingData.Population
          Constant Constant1: FixedValue=0.001
        MultiplyFunction KLComboeffects
          VariableReference Biommod: VariableName=[Root].KLBiomMod
          VariableReference klpopmod2: VariableName=[Root].klPopMultiplier
          VariableReference klRSmod2: VariableName=[Root].klRowSpaceMultiplier
        LinearInterpolationFunction KLBiomMod
          XYPairs: X=[0, 200, 350, 500, 700]; Y=[0.1, 0.6, 1, 1.1, 1.2]
          VariableReference XValue: VariableName=[Lentil].AboveGround.Wt
        LinearInterpolationFunction KLPopMultiplier
          XYPairs: X=[10, 20, 40, 60, 80]; Y=[0.8, 0.9, 1, 1.1, 1.2]
          VariableReference XValue: VariableName=[Lentil].SowingData.Population
        LinearInterpolationFunction KLRowSpaceMultiplier
          XYPairs: X=[0, 200, 350, 500, 1000]; Y=[1.05, 1.05, 1, 0.95, 0.8]
          VariableReference XValue: VariableName=[Lentil].SowingData.RowSpacing
        VariableReference CriticalNConc: VariableName=[Root].MinimumNConc
        NutrientPoolFunctions InitialWt
          Constant Structural: FixedValue=0.2; Units=g/plant
          Constant Metabolic: FixedValue=0
          Constant Storage: FixedValue=0
      GenericOrgan Shell: IsAboveGround=true
        MultiplyFunction PodNumber
          Constant PodsPerNode: FixedValue=2
          VariableReference StemPopulation: VariableName=[Structure].TotalStemPopn
        Constant NReallocationFactor: FixedValue=1
        Constant NRetranslocationFactor: FixedValue=0.5
        Constant MaximumNConc: FixedValue=0.02
        VariableReference CriticalNConc: VariableName=[Shell].MinimumNConc
        Constant MinimumNConc: FixedValue=0.007
        Constant DMRetranslocationFactor: FixedValue=0.5
        Constant DMReallocationFactor: FixedValue=1
        PhaseLookupValue NitrogenDemandSwitch: Start=Germination; End=Maturity
          Constant: FixedValue=1
        BiomassRemoval BiomassRemovalDefaults: HarvestFractionLiveToRemove=0.5; HarvestFractionDeadToRemove=0; HarvestFractionLiveToResidue=0.1; HarvestFractionDeadToResidue=0
        Constant DetachmentRateFunction: FixedValue=0; Units=/d
        Constant MaintenanceRespirationFunction: FixedValue=0; Units=0-1
        Constant DMConversionEfficiency: FixedValue=1; Units=0-1
        Constant RemobilisationCost: FixedValue=0
        Constant CarbonConcentration: FixedValue=0.4
        Constant PotentialHarvestIndex: FixedValue=0.2
        NutrientDemandFunctions DMDemands
          MultiplyFunction Structural
            PhaseLookup DMDemandFunction
              PhaseLookupValue PodDevelopment: Start=EndPodInitiation; End=MidGrainFilling
                MultiplyFunction HIPodDemand
                  VariableReference AboveGroundWt: VariableName=[AboveGround].Wt
                  DivideFunction HarvestIndexIncrease
                    VariableReference PotentialHarvestIndex: VariableName=[Shell].PotentialHarvestIndex
                    VariableReference FillingDuration: VariableName=[Shell].FillingDuration
                  VariableReference ThermalTime: VariableName=[Phenology].ThermalTime
            Constant StructuralFraction: FixedValue=1; Units=g/g
          Constant Metabolic: FixedValue=0
          StorageDMDemandFunction Storage
            SubtractFunction StorageFraction
              Constant One: FixedValue=1
              VariableReference StructuralFraction: VariableName=[Shell].DMDemands.Structural.StructuralFraction
          Constant QStructuralPriority: FixedValue=1
          Constant QMetabolicPriority: FixedValue=1
          Constant QStoragePriority: FixedValue=1
        AddFunction FillingDuration
          VariableReference EarlyGrainFillingDuration: VariableName=[Phenology].EarlyGrainFilling.Target
          VariableReference MidGrainFillingDuration: VariableName=[Phenology].MidGrainFilling.Target
          VariableReference LateGrainFillingDuration: VariableName=[Phenology].MidGrainFilling.Target
        NutrientDemandFunctions NDemands
          MultiplyFunction Structural
            VariableReference MinNconc: VariableName=[Shell].minimumNconc
            VariableReference PotentialDMAllocation: VariableName=[Shell].potentialDMAllocation.Structural
          MultiplyFunction Metabolic
            SubtractFunction MetabolicNconc
              VariableReference CritNconc: VariableName=[Shell].criticalNConc
              VariableReference MinNconc: VariableName=[Shell].minimumNconc
            VariableReference PotentialDMAllocation: VariableName=[Shell].potentialDMAllocation.Structural
          StorageNDemandFunction Storage
            VariableReference NitrogenDemandSwitch: VariableName=[Shell].nitrogenDemandSwitch
            VariableReference MaxNconc: VariableName=[Shell].maximumNconc
          Constant QStructuralPriority: FixedValue=1
          Constant QMetabolicPriority: FixedValue=1
          Constant QStoragePriority: FixedValue=1
        RetranslocateNonStructural RetranslocateNitrogen
        NutrientPoolFunctions InitialWt
          Constant Structural: FixedValue=0; Units=g/m^2
          Constant Metabolic: FixedValue=0
          Constant Storage: FixedValue=0
        PhaseLookup SenescenceRate
          PhaseLookupValue ReproductivePhase: Start=MidGrainFilling; End=Maturity
            MinimumFunction Rate
              DivideFunction Fraction
                VariableReference TT: VariableName=[Phenology].ThermalTime
                  SubtractFunction TTRemaining
                    ExpressionFunction ReproductiveTT
                      Expression=[Phenology].MidGrainFilling.Target+[Phenology].LateGrainFilling.Target
                    ExpressionFunction ReproductiveTT1Complete
                      Expression=[Phenology].MidGrainFilling.ProgressThroughPhase+[Phenology].LateGrainFilling.ProgressThroughPhase
              Constant One: FixedValue=1
        Constant Photosynthesis: FixedValue=0
        VariableReference InitialNConcFunction: VariableName=[Shell].MinimumNConc
      Leaf: MaxCover=1; Albedo=0.25; Gsmax350=0.015; R50=150; KDead=0.3; MaximumMainStemLeafNumber=40
        zero: CurrentExpandingLeaf, StartFractionExpanded, FractionNextleafExpanded, DeadNodesYesterday, GrowthRespiration, LAI, Depth, Width, PotentialEP, WaterDemand, TipsAtEmergence, CohortsAtInitialisation, FractionDied
        Memo
          Dead leaf ext coeff - may need to be higher than 0.3 - chickpea holds its shape pretty well when dead
        LeafCohort InitialLeaf1: Rank=1; Area=50
          zero: NReallocationFactor, DMReallocationFactor, NRetranslocationFactor, DMRetranslocationFactor, ShadeInducedSenRate, SenescedFrac, DeltaPotentialArea, DeltaStressConstrainedArea, DeltaCarbonConstrainedArea, PotentialStructuralDMAllocation, PotentialMetabolicDMAllocation, MetabolicNReallocated, MetabolicWtReallocated, StorageNReallocated, StorageWtReallocated, MetabolicNRetranslocated, StorageNRetrasnlocated, DMRetranslocated, MetabolicNAllocation, StructuralDMAllocation, MetabolicDMAllocation
        LeafCohort InitialLeaf2: Rank=2; Area=100
          zero: NReallocationFactor, DMReallocationFactor, NRetranslocationFactor, DMRetranslocationFactor, ShadeInducedSenRate, SenescedFrac, DeltaPotentialArea, DeltaStressConstrainedArea, DeltaCarbonConstrainedArea, PotentialStructuralDMAllocation, PotentialMetabolicDMAllocation, MetabolicNReallocated, MetabolicWtReallocated, StorageNReallocated, StorageWtReallocated, MetabolicNRetranslocated, StorageNRetrasnlocated, DMRetranslocated, MetabolicNAllocation, StructuralDMAllocation, MetabolicDMAllocation
        LeafCohort InitialLeaf3: Rank=3; Area=150
          zero: NReallocationFactor, DMReallocationFactor, NRetranslocationFactor, DMRetranslocationFactor, ShadeInducedSenRate, SenescedFrac, DeltaPotentialArea, DeltaStressConstrainedArea, DeltaCarbonConstrainedArea, PotentialStructuralDMAllocation, PotentialMetabolicDMAllocation, MetabolicNReallocated, MetabolicWtReallocated, StorageNReallocated, StorageWtReallocated, MetabolicNRetranslocated, StorageNRetrasnlocated, DMRetranslocated, MetabolicNAllocation, StructuralDMAllocation, MetabolicDMAllocation
        LeafCohortParameters: ExpansionStressValue=0; CellDivisionStressValue=0; LagAccelerationValue=0; SenescenceAccelerationValue=0; ShadeInducedSenescenceRateValue=0; SenessingLeafRelativeSizeValue=0
          PhaseLookup StorageFraction
            PhaseLookupValue Vegetative_to_Flowering: Start=Emergence; End=StartFlowering
              Constant Fraction: FixedValue=0
            PhaseLookupValue Flowering: Start=StartFlowering; End=EndPodInitiation
              Constant Fraction: FixedValue=0
            PhaseLookupValue Grainfilling: Start=EndPodInitiation; End=EndGrainFill
              Constant Fraction: FixedValue=0
          PhaseLookup StructuralFraction
            PhaseLookupValue Vegetative_to_Flowering: Start=Emergence; End=StartFlowering
              Constant Fraction: FixedValue=0.99
            PhaseLookupValue Flowering: Start=StartFlowering; End=EndPodInitiation
              Constant Fraction: FixedValue=0.99
            PhaseLookupValue Grainfilling: Start=EndPodInitiation; End=EndGrainFill
              Constant Fraction: FixedValue=0.99
          Constant SenessingLeafRelativeSize: FixedValue=1; Units=0-1
          PhaseLookup MaxArea
            PhaseLookupValue PreEmergence: Start=Germination; End=Emergence
              Constant MaxArea: FixedValue=0
            PhaseLookupValue Vegetative_to_Flowering: Start=Emergence; End=EndFlowering
              LinearInterpolationFunction MaxArea
                Memo
                  Is accumulated across all leaves that appear within a single phyllocron, so it ultimately depends on maximum branching rate
                XYPairs: X=[1, 5, 10, 13, 19, 23, 27, 35, 41]; Y=[50, 255, 466, 550, 1100, 1250, 1150, 435, 200]
                VariableReference XValue: VariableName=[Structure].LeafTipsAppeared
            PhaseLookupValue Flowering_to_Maturity: Start=EndFlowering; End=Maturity
              MinimumFunction
                LinearInterpolationFunction MaxArea
                  XYPairs: X=[1, 4, 12, 18]; Y=[1250, 1150, 435, 200]
                  VariableReference XValue: VariableName=[Phenology].PostFloweringMSLeafNo
                VariableReference PreFlowerMaxLA: VariableName=[Phenology].EndFloweringNodeLeafArea
          MultiplyFunction GrowthDuration
            Constant Multiplier: FixedValue=4
            VariableReference Phyllochron: VariableName=[Structure].Phyllochron
          MultiplyFunction LagDuration
            Constant Multiplier: FixedValue=18
            VariableReference Phyllochron: VariableName=[Structure].Phyllochron
          MultiplyFunction SenescenceDuration
            Constant Multiplier: FixedValue=2
            VariableReference Phyllochron: VariableName=[Structure].Phyllochron
          Constant DetachmentLagDuration: FixedValue=1000000
          Constant DetachmentDuration: FixedValue=46
          LinearInterpolationFunction SpecificLeafAreaMax
            XYPairs: X=[0, 2000]; Y=[22000, 15000]
            VariableReference XValue: VariableName=[Phenology].AccumulatedTT
          LinearInterpolationFunction SpecificLeafAreaMin
            XYPairs: X=[0, 2000]; Y=[20000, 14000]
            VariableReference XValue: VariableName=[Phenology].AccumulatedTT
          MinimumFunction ExpansionStress
            LinearInterpolationFunction WaterStress
              XYPairs: X=[0, 1]; Y=[0, 1]
              VariableReference XValue: VariableName=[Leaf].Fw
            LinearInterpolationFunction TemperatureEffect
              XYPairs: X=[0, 12, 14, 25, 30, 40]; Y=[0, 1, 1, 1, 1, 0]
              VariableReference XValue: VariableName=[Phenology].MeanTemp
            LinearInterpolationFunction Cover_response
              XYPairs: X=[0, 0.4, 0.5, 1]; Y=[1, 1, 1, 0.2]
              VariableReference XValue: VariableName=[leaf].CoverGreen
          MinimumFunction CellDivisionStress
            LinearInterpolationFunction Cover_response
              XYPairs: X=[0, 0.2, 0.4, 0.5, 0.6, 0.8, 1]; Y=[1, 1, 1, 1, 1, 0.3, 0]
              VariableReference XValue: VariableName=[leaf].CoverGreen
            LinearInterpolationFunction WaterStress
              XYPairs: X=[0, 1]; Y=[0, 1]
              VariableReference XValue: VariableName=[Leaf].Fw
          Constant MinimumNConc: FixedValue=0.02
          Constant CriticalNConc: FixedValue=0.05
          Constant MaximumNConc: FixedValue=0.08
          Constant NReallocationFactor: FixedValue=0.3
          Constant NRetranslocationFactor: FixedValue=0.1
            Memo
              Retranslocation = movement of reserves out of live organs.
              Reallocation = from senesced organs

              Storage fraction decides how much is available to be moved, while these decide what proportion can be moved each day
          Constant DMReallocationFactor: FixedValue=1
            Memo
              Reallocation = from senesced organs, fraction that can be moved per day
          Constant DMRetranslocationFactor: FixedValue=0.3
            Memo
              Retranslocation = movement of reserves out of live organs, what proportion can be moved each day
          Constant ShadeInducedSenescenceRate: FixedValue=0
          Constant InitialNConc: FixedValue=0.08
          Constant LeafSizeShapeParameter: FixedValue=0.01
          Constant MaintenanceRespirationFunction: FixedValue=0
          Constant LagAcceleration: FixedValue=1
          Constant SenescenceAcceleration: FixedValue=1
          Constant ArchiveCellDivisionStress: FixedValue=1; Units=0-1
          ArrayFunction LagDurationAgeMultiplier: Values=1 1 1
          ArrayFunction SenescenceDurationAgeMultiplier: Values=1 1 1
          ArrayFunction LeafSizeAgeMultiplier: Values=1 1 1 1 1 1 1 1 1 1 1 1
          Constant RemobilisationCost: FixedValue=0
          Constant CarbonConcentration: FixedValue=0.4
        VariableReference ThermalTime: VariableName=[Phenology].ThermalTime
        LinearInterpolationFunction ExtinctionCoeff
          XYPairs: X=[200, 350, 500, 750, 1000]; Y=[0.71, 0.69, 0.66, 0.57, 0.48]
          Memo
            Using soybean data from Flenet et al 1996 to establish trend, with data from Tesfaye et al 2006 for absolute values (close to 0.8 at 40cm RS). These high values also agreed with Thomas and Fukai 1995 (their measurements were at noon therefore they need to be increased for absolute light interception?). ICRISAT provided Ext coefficients at standard row spacings
          VariableReference XValue: VariableName=[Lentil].SowingData.RowSpacing
        RUEModel Photosynthesis
          Memo
            There is no specific TE parameter in NextGen. TE is an emergent property calculated separately from water use and biomass production
          Constant RUE: FixedValue=1.25
          WeightedTemperatureFunction FT: MaximumTemperatureWeighting=0.75
            XYPairs: X=[0, 15, 30, 40]; Y=[0, 1, 1, 0]
          Constant FVPD: FixedValue=1
          LinearInterpolationFunction FN
            XYPairs: X=[0, 1, 1.5]; Y=[0, 1, 1]
            VariableReference XValue: VariableName=[Leaf].Fn
          LinearInterpolationFunction FW
            XYPairs: X=[0, 1, 1.5]; Y=[0, 1, 1]
            VariableReference XValue: VariableName=[Leaf].Fw
          RUECO2Function FCO2: PhotosyntheticPathway=C3
          Memo
            Ayaz eta 2004 presented a RUE of 1.6 g/MJ PAR during non-limiting temperature conditions for field pea.  Halving this to make it total radiation gives 0.8 g/MJ and adding 20% to account for root and  nodule production and N fixiation costs gives 1.0 g/MJ

            However Sincalir had data that presented RUE of 2.0 hence by the same calcs we have advanced RUE to 1.2
          VariableReference RadnInt: VariableName=[Leaf].RadiationIntercepted
        PhaseLookup FrostFraction
          Memo
            Also includes high T and water stress effect end of season
          PhaseLookupValue PreEmergence: Start=Germination; End=Emergence
            Constant NA: FixedValue=1
          PhaseLookupValue Vegetative_to_Flowering: Start=Emergence; End=StartFlowering
            Constant FrostFraction: FixedValue=0
          PhaseLookupValue Flowering: Start=StartFlowering; End=EndPodInitiation
            Constant FrostFraction: FixedValue=0
          PhaseLookupValue EarlyGrainfilling: Start=EndPodInitiation; End=MidGrainFilling
            Constant FrostFraction: FixedValue=0
          PhaseLookupValue MidGrainfilling: Start=MidGrainFilling; End=LateGrainFilling
            Constant FrostFraction: FixedValue=0
          PhaseLookupValue LateGrainfilling: Start=LateGrainFilling; End=EndGrainFill
            MaximumFunction
              Constant FrostFraction: FixedValue=0
              LinearInterpolationFunction HighTemp
                XYPairs: X=[0, 35, 40]; Y=[0, 0, 1]
                VariableReference XValue: VariableName=[Weather].MaxT
              LinearInterpolationFunction WaterStress
                XYPairs: X=[0, 0.1, 0.2, 0.3, 0.5, 0.8, 1]; Y=[0.2, 0, 0, 0, 0, 0, 0]
                VariableReference XValue: VariableName=[leaf].Fw
        MinimumFunction FRGRFunction
          VariableReference RUE_FT: VariableName=[Leaf].Photosynthesis.FT
          MinimumFunction Others
            VariableReference RUE_FN: VariableName=[Leaf].Photosynthesis.FN
            VariableReference RUE_FVPD: VariableName=[Leaf].Photosynthesis.FVPD
        BiomassRemoval BiomassRemovalDefaults: HarvestFractionLiveToRemove=0; HarvestFractionDeadToRemove=0; HarvestFractionLiveToResidue=0.3; HarvestFractionDeadToResidue=0
        Constant DMConversionEfficiency: FixedValue=1
        Constant RemobilisationCost: FixedValue=0
        Constant CarbonConcentration: FixedValue=0.4
        Constant WidthFunction: FixedValue=0
        VariableReference DepthFunction: VariableName=[Leaf].Height
        StomatalConductanceCO2Modifier
          VariableReference PhotosynthesisCO2Modifier: VariableName=[Leaf].Photosynthesis.FCO2
        VariableReference StructuralFraction: VariableName=[Leaf].LeafCohortParameters.StructuralFraction
        NutrientPoolFunctions DMDemandPriorityFactors: same as Replacements.Lentil.Grain.DMDemandPriorityFactors
        NutrientPoolFunctions NDemandPriorityFactors: same as Replacements.Lentil.Grain.DMDemandPriorityFactors
      GenericOrgan Stem: IsAboveGround=true
        Constant NReallocationFactor: FixedValue=1
          Memo
            Rate (fraction per day) at which N can be reallocated e.g. SPECIFICALLY from sensecing stem
        Constant NRetranslocationFactor: FixedValue=0.5
          Memo
            fraction per day of stored stem reserves that can be used elsewhere - from live leaves, not seneseced
        Constant DMReallocationFactor: FixedValue=1
          Memo
            How quickly will it reallocate somwhere else (0.1) = 10% per day FROM SENESCED STEM
        Constant DMRetranslocationFactor: FixedValue=0.5
          Memo
            How quickly will it retranslocate somwhere else from LIVE stem (0.1) = 10% per day
        Constant MaximumNConc: FixedValue=0.02
        Constant MinimumNConc: FixedValue=0.007
        PhaseLookupValue NitrogenDemandSwitch: Start=Emergence; End=EndGrainFill
          Constant: FixedValue=1
        BiomassRemoval BiomassRemovalDefaults: HarvestFractionLiveToRemove=0.5; HarvestFractionDeadToRemove=0; HarvestFractionLiveToResidue=0.1; HarvestFractionDeadToResidue=0
        Constant DetachmentRateFunction: FixedValue=0; Units=/d
        Constant MaintenanceRespirationFunction: FixedValue=0; Units=0-1
        Constant DMConversionEfficiency: FixedValue=1; Units=0-1
        VariableReference CriticalNConc: VariableName=[Stem].MinimumNConc
        Constant RemobilisationCost: FixedValue=0
          Constant DMConversionEfficiency: FixedValue=1; Units=0-1
        Constant CarbonConcentration: FixedValue=0.4
        NutrientDemandFunctions NDemands
          MultiplyFunction Structural
            VariableReference MinNconc: VariableName=[Stem].minimumNconc
            VariableReference PotentialDMAllocation: VariableName=[Stem].potentialDMAllocation.Structural
          MultiplyFunction Metabolic
            SubtractFunction MetabolicNconc
              VariableReference CritNconc: VariableName=[Stem].criticalNConc
              VariableReference MinNconc: VariableName=[Stem].minimumNconc
            VariableReference PotentialDMAllocation: VariableName=[Stem].potentialDMAllocation.Structural
          StorageNDemandFunction Storage
            VariableReference NitrogenDemandSwitch: VariableName=[Stem].nitrogenDemandSwitch
            VariableReference MaxNconc: VariableName=[Stem].maximumNconc
          Constant QStructuralPriority: FixedValue=1
          Constant QMetabolicPriority: FixedValue=1
          Constant QStoragePriority: FixedValue=1
        RetranslocateNonStructural RetranslocateNitrogen
        NutrientDemandFunctions DMDemands
          MultiplyFunction Structural
            PhaseLookup Fraction
              PhaseLookupValue EarlyVegetative: Start=Emergence; End=StartBudding
                Constant Fraction: FixedValue=0.5
              PhaseLookupValue FloralInitiation: Start=StartBudding; End=StartFlowering
                Constant Fraction: FixedValue=0.5
              PhaseLookupValue Flowering: Start=StartFlowering; End=EndPodInitiation
                Constant Fraction: FixedValue=0.3
              PhaseLookupValue EarlyGrainfilling: Start=EndPodInitiation; End=MidGrainFilling
                Constant Fraction: FixedValue=0.2
              PhaseLookupValue MidGrainfilling: Start=MidGrainFilling; End=LateGrainFilling
                Constant Fraction: FixedValue=0.1
              PhaseLookupValue LateGrainfilling: Start=LateGrainFilling; End=EndGrainFill
                Constant Fraction: FixedValue=0
            VariableReference DMDemand: VariableName=[Stem].PotentialGrowth
          Constant Metabolic: FixedValue=0
          MultiplyFunction Storage
            VariableReference DMDemand: VariableName=[Stem].PotentialGrowth
            SubtractFunction StorageFraction
              Constant One: FixedValue=1
              VariableReference StructuralFraction: VariableName=[Stem].DMDemands.Structural.Fraction
          Constant QStructuralPriority: FixedValue=1
          Constant QMetabolicPriority: FixedValue=1
          Constant QStoragePriority: FixedValue=1
        PartitionFractionDemandFunction PotentialGrowth
          PhaseLookup PartitionFraction
            PhaseLookupValue EarlyVegetative: Start=Emergence; End=StartBudding
              Constant Fraction: FixedValue=0.9
            PhaseLookupValue FloralInitiation: Start=StartBudding; End=StartFlowering
              Constant Fraction: FixedValue=0.9
            PhaseLookupValue Flowering: Start=StartFlowering; End=EndPodInitiation
              Constant Fraction: FixedValue=0.9
            PhaseLookupValue EarlyGrainfilling: Start=EndPodInitiation; End=MidGrainFilling
              Constant Fraction: FixedValue=0.5
            PhaseLookupValue MidGrainfilling: Start=MidGrainFilling; End=LateGrainFilling
              Constant Fraction: FixedValue=0.3
            PhaseLookupValue LateGrainfilling: Start=LateGrainFilling; End=EndGrainFill
              Constant Fraction: FixedValue=0
        NutrientPoolFunctions InitialWt: same as Replacements.Lentil.Shell.InitialWt
        PhaseLookup SenescenceRate
          PhaseLookupValue PostCanopyPhase: Start=MidGrainFilling; End=Maturity
            MinimumFunction Rate
              DivideFunction Fraction
                VariableReference TT: VariableName=[Phenology].ThermalTime
                SubtractFunction TTRemaining
                  ExpressionFunction PostCanopyTT
                    Expression=[Phenology].MidGrainFilling.Target+[Phenology].LateGrainFilling.Target
                  ExpressionFunction PostCanopyTTComplete
                    Expression=[Phenology].MidGrainFilling.ProgressThroughPhase+[Phenology].LateGrainFilling.ProgressThroughPhase
              Constant One: FixedValue=1
        Constant Photosynthesis: FixedValue=0
        VariableReference InitialNConcFunction: VariableName=[Stem].MinimumNConc
      Nodule
        Constant FixationMetabolicCost: FixedValue=0
        Constant MaximumNConc: FixedValue=0.02
        Constant MinimumNConc: FixedValue=0.01
        Constant SenescenceRate: FixedValue=0
        Constant NReallocationFactor: FixedValue=0
        PhaseLookupValue NitrogenDemandSwitch: Start=Emergence; End=EndGrainFill
          Constant: FixedValue=1
        BiomassRemoval BiomassRemovalDefaults: HarvestFractionLiveToRemove=0; HarvestFractionDeadToRemove=0; HarvestFractionLiveToResidue=0; HarvestFractionDeadToResidue=0
        Constant InitialWtFunction: FixedValue=0; Units=g/m^2
        Constant DetachmentRateFunction: FixedValue=0; Units=/d
        Constant FixationRate: FixedValue=10000; Units=g/m^2/d
        Constant MaintenanceRespirationFunction: FixedValue=0; Units=0-1
        Constant DMConversionEfficiency: FixedValue=1; Units=0-1
        Constant NRetranslocationFactor: FixedValue=0
        Constant DMReallocationFactor: FixedValue=0
        Constant DMRetranslocationFactor: FixedValue=0
        VariableReference CriticalNConc: VariableName=[Nodule].MinimumNConc
        Constant RemobilisationCost: FixedValue=0
        Constant CarbonConcentration: FixedValue=0.4
        NutrientPoolFunctions DMDemands
          MultiplyFunction Structural
            PartitionFractionDemandFunction DMDemandFunction
              PhaseLookup PartitionFraction
                PhaseLookupValue Early: Start=Emergence; End=StartFlowering
                  Constant Function: FixedValue=0
                PhaseLookupValue Middle: Start=StartFlowering; End=EndFlowering
                  Constant Function: FixedValue=0
                PhaseLookupValue Late: Start=EndFlowering; End=Maturity
                  Constant Function: FixedValue=0
            Constant StructuralFraction: FixedValue=1; Units=g/g
          Constant Metabolic: FixedValue=0
          StorageDMDemandFunction Storage
            SubtractFunction StorageFraction
              Constant One: FixedValue=1
              VariableReference StructuralFraction: VariableName=[Nodule].DMDemands.Structural.StructuralFraction
        NutrientPoolFunctions NDemands
          MultiplyFunction Structural
            VariableReference MinNconc: VariableName=[Nodule].minimumNconc
            VariableReference PotentialDMAllocation: VariableName=[Nodule].potentialDMAllocation.Structural
          MultiplyFunction Metabolic
            SubtractFunction MetabolicNconc
              VariableReference CritNconc: VariableName=[Nodule].criticalNConc
              VariableReference MinNconc: VariableName=[Nodule].minimumNconc
            VariableReference PotentialDMAllocation: VariableName=[Nodule].potentialDMAllocation.Structural
          StorageNDemandFunction Storage
            VariableReference NitrogenDemandSwitch: VariableName=[Nodule].nitrogenDemandSwitch
            VariableReference MaxNconc: VariableName=[Nodule].maximumNconc
      CompositeBiomass AboveGround: OrganNames=[Leaf, Stem, Grain, Shell]; IncludeLive=true; IncludeDead=true
      CompositeBiomass BelowGround: OrganNames=[Root, Nodule]; IncludeLive=true; IncludeDead=true
      CompositeBiomass Total: OrganNames=[Leaf, Stem, Grain, Shell, Root, Nodule]; IncludeLive=true; IncludeDead=true
      CompositeBiomass TotalLive: OrganNames=[Leaf, Stem, Grain, Shell, Root, Nodule]; IncludeLive=true; IncludeDead=false
      CompositeBiomass TotalDead: OrganNames=[Leaf, Stem, Grain, Shell, Root, Nodule]; IncludeLive=false; IncludeDead=true
      CompositeBiomass Pod: OrganNames=[Shell, Grain]; IncludeLive=true; IncludeDead=true
      Constant MortalityRate: FixedValue=0
      Constant SeedMortalityRate: FixedValue=0
      Folder Cultivars
        Cultivar Bolt
        Cultivar Ace
        Cultivar Blitz
        Cultivar Greenfield
        Cultivar HallmarkXT
        Cultivar Jumbo2
        Cultivar Digger
        Cultivar Nugget
        Cultivar Northfield
        Folder Australian cvv
          Cultivar Amethyst
          Cultivar Almaz
            Command:
              [Phenology].Emerging.Target.ShootLag.FixedValue = 140
              [Phenology].Vegetative.Target.FixedValue = 500
              [Phenology].FloralInitiation.Target.FixedValue = 100
              [Phenology].Budding.Target.XYPairs.X = 10, 13.17, 17
              [Phenology].Budding.Target.XYPairs.Y = 665, 50, 50
          Cultivar Boundary
          Cultivar CICA1521
            Command:
              [Phenology].Vegetative.Target.FixedValue = 600
              [Phenology].FloralInitiation.Target.FixedValue = 100
              [Phenology].Budding.Target.XYPairs.X = 10, 12.54, 17
              [Phenology].Budding.Target.XYPairs.Y = 453, 50, 50
          Cultivar Drummond
            Command:
              [Phenology].Vegetative.Target.FixedValue = 600
              [Phenology].FloralInitiation.Target.FixedValue = 100
              [Phenology].Budding.Target.XYPairs.X = 10, 12.54, 17
              [Phenology].Budding.Target.XYPairs.Y = 453, 50, 50
              [Phenology].Flowering.Target.FixedValue = 200
              [Phenology].PodInitiation.Target.Total.FixedValue = 8
          Cultivar Genesis90
            Command:
              [Phenology].Emerging.Target.ShootLag.FixedValue = 140
              [Phenology].Vegetative.Target.FixedValue = 600
              [Phenology].FloralInitiation.Target.FixedValue = 0
              [Phenology].Budding.Target.XYPairs.X = 10, 15.62, 17
              [Phenology].Budding.Target.XYPairs.Y = 300, 300, 300
              [Phenology].Flowering.Target.FixedValue = 200
              [Phenology].PodInitiation.Target.Total.FixedValue = 8
          Cultivar HatTrick
          Cultivar Kalkee
            Command:
              [Phenology].Emerging.Target.ShootLag.FixedValue = 140
              [Phenology].Vegetative.Target.FixedValue = 600
              [Phenology].FloralInitiation.Target.FixedValue = 0
              [Phenology].Budding.Target.XYPairs.X = 10, 14.31, 17
              [Phenology].Budding.Target.XYPairs.Y = 633, 50, 50
              [Phenology].Flowering.Target.FixedValue = 200
          Cultivar Kyabra
            Command:
              [Phenology].FloralInitiation.Target.FixedValue = 200
              [Phenology].Budding.Target.XYPairs.X = 10, 12.51, 17
              [Phenology].Budding.Target.XYPairs.Y = 466, 50, 50
              [Phenology].Flowering.Target.FixedValue = 250
              [Phenology].PodInitiation.Target.Total.FixedValue = 8
          Cultivar Monarch
            Command:
              [Phenology].Emerging.Target.ShootLag.FixedValue = 140
              [Phenology].Vegetative.Target.FixedValue = 600
              [Phenology].FloralInitiation.Target.FixedValue = 0
              [Phenology].Budding.Target.XYPairs.X = 10, 13.45, 17
              [Phenology].Budding.Target.XYPairs.Y = 621, 50, 50
              [Phenology].Flowering.Target.FixedValue = 200
              [Phenology].PodInitiation.Target.Total.FixedValue = 8
          Cultivar Pistol
            Command:
              [Phenology].FloralInitiation.Target.FixedValue = 200
              [Phenology].Budding.Target.XYPairs.X = 10, 12.51, 17
              [Phenology].Budding.Target.XYPairs.Y = 466, 50, 50
              [Phenology].Flowering.Target.FixedValue = 200
          Cultivar QuickKabuli
            Command:
              [Phenology].Emerging.Target.ShootLag.FixedValue = 140
              [Phenology].Vegetative.Target.FixedValue = 600
              [Phenology].FloralInitiation.Target.FixedValue = 0
              [Phenology].Budding.Target.XYPairs.X = 10, 13.45, 17
              [Phenology].Budding.Target.XYPairs.Y = 621, 50, 50
              [Phenology].Flowering.Target.FixedValue = 150
          Cultivar Seamer
            Command:
              [Phenology].FloralInitiation.Target.FixedValue = 200
              [Phenology].Budding.Target.XYPairs.X = 10, 12.51, 17
              [Phenology].Budding.Target.XYPairs.Y = 466, 50, 50
              [Phenology].Flowering.Target.FixedValue = 200
              [Phenology].PodInitiation.Target.Total.FixedValue = 5
          Cultivar Slasher
            Command:
              [Phenology].FloralInitiation.Target.FixedValue = 200
              [Phenology].Budding.Target.XYPairs.X = 10, 12.51, 17
              [Phenology].Budding.Target.XYPairs.Y = 466, 50, 50
              [Phenology].Flowering.Target.FixedValue = 100
              [Phenology].PodInitiation.Target.Total.FixedValue = 5
          Cultivar SlowDesi
            Command:
              [Phenology].Vegetative.Target.FixedValue = 600
              [Phenology].FloralInitiation.Target.FixedValue = 100
              [Phenology].Budding.Target.XYPairs.X = 10, 12.54, 17
              [Phenology].Budding.Target.XYPairs.Y = 453, 50, 50
          Cultivar Striker
            Command:
              [Phenology].FloralInitiation.Target.FixedValue = 200
              [Phenology].Budding.Target.XYPairs.X = 10, 12.51, 17
              [Phenology].Budding.Target.XYPairs.Y = 466, 50, 50
              [Phenology].Flowering.Target.FixedValue = 200
              [Phenology].PodInitiation.Target.Total.FixedValue = 5
          Cultivar Genesis90_archivePPsensitive
            Command:
              [Phenology].Emerging.Target.ShootLag.FixedValue = 140
              [Phenology].Vegetative.Target.FixedValue = 600
              [Phenology].FloralInitiation.Target.FixedValue = 0
              [Phenology].Budding.Target.XYPairs.X = 10, 15.62, 17
              [Phenology].Budding.Target.XYPairs.Y = 478, 50, 50
              [Phenology].Flowering.Target.FixedValue = 200
              [Phenology].PodInitiation.Target.Total.FixedValue = 8
        Folder ICRISAT cvv
          Cultivar JAKI
            Command:
              [Phenology].Emerging.Target.ShootLag.FixedValue = 140
              [Phenology].Vegetative.Target.FixedValue = 550
              [Phenology].FloralInitiation.Target.FixedValue = 0
              [Phenology].Budding.Target.XYPairs.X = 10, 15.62, 17
              [Phenology].Budding.Target.XYPairs.Y = 478, 50, 50
              [Phenology].Flowering.Target.FixedValue = 200
              [Phenology].PodInitiation.Target.Total.FixedValue = 8
              [Leaf].LeafCohortParameters.MaxArea.Vegetative_to_Flowering.MaxArea.XYPairs.X = 1,  9,  19,   23,   30,    38
              [Leaf].LeafCohortParameters.MaxArea.Vegetative_to_Flowering.MaxArea.XYPairs.Y = 200,  400,  1000,  1000, 400,  0
              [Leaf].LeafCohortParameters.MaxArea.Flowering_to_Maturity.MinimumFunction.MaxArea.XYPairs.X = 1,   7,    15
              [Leaf].LeafCohortParameters.MaxArea.Flowering_to_Maturity.MinimumFunction.MaxArea.XYPairs.Y = 1000, 400,  10
              [Leaf].LeafCohortParameters.SpecificLeafAreaMax.XYPairs.X = 0, 1800
              [Leaf].LeafCohortParameters.SpecificLeafAreaMax.XYPairs.Y = 32000, 2000
              [Leaf].LeafCohortParameters.SpecificLeafAreaMin.XYPairs.X = 0, 1800
              [Leaf].LeafCohortParameters.SpecificLeafAreaMin.XYPairs.Y = 30000, 1000
              [Root].KLBiomMod.XYPairs.X = 0, 200, 350, 500, 700
              [Root].KLBiomMod.XYPairs.Y = 0.3, 0.8, 1.0, 1.2, 1.4
              [Structure].FinalLeafNumber.FixedValue = 26
          Cultivar ICCV2
            Command:
              [Phenology].Emerging.Target.ShootLag.FixedValue = 140
              [Phenology].FloralInitiation.Target.FixedValue = 100
              [Phenology].Budding.Target.XYPairs.X = 10, 12.51, 17
              [Phenology].Budding.Target.XYPairs.Y = 466, 50, 50
              [Phenology].Flowering.Target.FixedValue = 150
              [Phenology].PodInitiation.Target.Total.FixedValue = 5
              [Phenology].MidGrainFilling.Target.FixedValue = 350
              [Leaf].LeafCohortParameters.MaxArea.Vegetative_to_Flowering.MaxArea.XYPairs.X = 1,  8,  21,   25,   40
              [Leaf].LeafCohortParameters.MaxArea.Vegetative_to_Flowering.MaxArea.XYPairs.Y = 200,  700,  1000,   200,  100
              [Leaf].LeafCohortParameters.MaxArea.Flowering_to_Maturity.MinimumFunction.MaxArea.XYPairs.X = 1,   5,   20
              [Leaf].LeafCohortParameters.MaxArea.Flowering_to_Maturity.MinimumFunction.MaxArea.XYPairs.Y =  1000,   200,  100
              [Leaf].LeafCohortParameters.SpecificLeafAreaMax.XYPairs.X = 0, 1800
              [Leaf].LeafCohortParameters.SpecificLeafAreaMax.XYPairs.Y = 32000, 2000
              [Leaf].LeafCohortParameters.SpecificLeafAreaMin.XYPairs.X = 0, 1800
              [Leaf].LeafCohortParameters.SpecificLeafAreaMin.XYPairs.Y = 30000, 1000
              [Root].KLBiomMod.XYPairs.X = 0, 200, 350, 500, 700
              [Root].KLBiomMod.XYPairs.Y = 0.3, 0.8, 1.0, 1.2, 1.4
              [Structure].FinalLeafNumber.FixedValue = 24
          Cultivar NBeG47
            Command:
              [Leaf].LeafCohortParameters.MaxArea.Vegetative_to_Flowering.MaxArea.XYPairs.X = 1,  9,  16,   21,   31, 39
              [Leaf].LeafCohortParameters.MaxArea.Vegetative_to_Flowering.MaxArea.XYPairs.Y = 270,  670,  1250,   1250,  670, 0
              [Leaf].LeafCohortParameters.MaxArea.Flowering_to_Maturity.MinimumFunction.MaxArea.XYPairs.X =   1,   11, 19
              [Leaf].LeafCohortParameters.MaxArea.Flowering_to_Maturity.MinimumFunction.MaxArea.XYPairs.Y =   1250,  670, 10
              [Leaf].ExtinctionCoeff.XYPairs.X = 200, 350, 500, 750, 1000
              [Leaf].ExtinctionCoeff.XYPairs.Y = 0.51, 0.49, 0.46, 0.43, 0.35
              [Leaf].LeafCohortParameters.SpecificLeafAreaMax.XYPairs.X = 0, 1800
              [Leaf].LeafCohortParameters.SpecificLeafAreaMax.XYPairs.Y = 32000, 2000
              [Leaf].LeafCohortParameters.SpecificLeafAreaMin.XYPairs.X = 0, 1800
              [Leaf].LeafCohortParameters.SpecificLeafAreaMin.XYPairs.Y = 30000, 1000
              [Root].KLBiomMod.XYPairs.X = 0, 200, 350, 500, 700
              [Root].KLBiomMod.XYPairs.Y = 0.3, 0.8, 1.0, 1.2, 1.4
              [Phenology].MidGrainFilling.Target.FixedValue = 350
              [Structure].FinalLeafNumber.FixedValue = 30
          Cultivar NBeG119
            Command:
              [Phenology].Emerging.Target.ShootLag.FixedValue = 140
              [Phenology].FloralInitiation.Target.FixedValue = 100
              [Phenology].Budding.Target.XYPairs.X = 10, 12.51, 17
              [Phenology].Budding.Target.XYPairs.Y = 466, 50, 50
              [Phenology].Flowering.Target.FixedValue = 150
              [Phenology].PodInitiation.Target.Total.FixedValue = 5
              [Phenology].MidGrainFilling.Target.FixedValue = 350
              [Leaf].LeafCohortParameters.MaxArea.Vegetative_to_Flowering.MaxArea.XYPairs.X = 1,  10,  22,   30,   40
              [Leaf].LeafCohortParameters.MaxArea.Vegetative_to_Flowering.MaxArea.XYPairs.Y = 200,  900,  900,   300,  100
              [Leaf].LeafCohortParameters.MaxArea.Flowering_to_Maturity.MinimumFunction.MaxArea.XYPairs.X = 1,   8,   18
              [Leaf].LeafCohortParameters.MaxArea.Flowering_to_Maturity.MinimumFunction.MaxArea.XYPairs.Y =  900,   300,  100
              [Leaf].ExtinctionCoeff.XYPairs.X = 200, 350, 500, 750, 1000
              [Leaf].ExtinctionCoeff.XYPairs.Y = 0.76, 0.74, 0.71, 0.60, 0.51
              [Leaf].LeafCohortParameters.SpecificLeafAreaMax.XYPairs.X = 0, 1800
              [Leaf].LeafCohortParameters.SpecificLeafAreaMax.XYPairs.Y = 32000, 2000
              [Leaf].LeafCohortParameters.SpecificLeafAreaMin.XYPairs.X = 0, 1800
              [Leaf].LeafCohortParameters.SpecificLeafAreaMin.XYPairs.Y = 30000, 1000
              [Root].KLBiomMod.XYPairs.X = 0, 200, 350, 500, 700
              [Root].KLBiomMod.XYPairs.Y = 0.3, 0.8, 1.0, 1.2, 1.4
              [Structure].FinalLeafNumber.FixedValue = 28
        Folder Other cvv
          Cultivar Anwar
            Command:
              [Leaf].LeafCohortParameters.MaxArea.Vegetative_to_Flowering.MaxArea.XYPairs.X = 1,  5,  10,  21
              [Leaf].LeafCohortParameters.MaxArea.Vegetative_to_Flowering.MaxArea.XYPairs.Y = 224,  224,  489, 1080
              [Phenology].Vegetative.Target.FixedValue = 490
              [Phenology].Vegetative.Progression.PhotoperiodModifier.CriticalPhotoperiod = 11
          Cultivar Ayaz
            Command:
              [Leaf].LeafCohortParameters.MaxArea.Vegetative_to_Flowering.MaxArea.XYPairs.X = 1,  5,  10,  21
              [Leaf].LeafCohortParameters.MaxArea.Vegetative_to_Flowering.MaxArea.XYPairs.Y = 224,  224,  489, 1080
              [Phenology].Vegetative.Target.FixedValue = 550
          Cultivar Hashem
            Command:
              [Leaf].LeafCohortParameters.MaxArea.Vegetative_to_Flowering.MaxArea.XYPairs.X = 1,  5,  10,  21
              [Leaf].LeafCohortParameters.MaxArea.Vegetative_to_Flowering.MaxArea.XYPairs.Y = 224,  224,  489, 1080
              [Phenology].Vegetative.Target.FixedValue = 610
              [Phenology].Vegetative.Progression.PhotoperiodModifier.CriticalPhotoperiod = 10.3
      Folder Archived Cultivars
        Cultivar 99_73C
          Command:
            [Leaf].LeafCohortParameters.MaxArea.Vegetative_to_Flowering.MaxArea.XYPairs.X = 1,  5,  10,  21
            [Leaf].LeafCohortParameters.MaxArea.Vegetative_to_Flowering.MaxArea.XYPairs.Y = 224,  224,  489, 1080
            [Phenology].Vegetative.Target.FixedValue = 440
            [Phenology].Vegetative.Progression.PhotoperiodModifier.CriticalPhotoperiod = 11
        Cultivar 99_66C
          Command:
            [Leaf].LeafCohortParameters.MaxArea.Vegetative_to_Flowering.MaxArea.XYPairs.X = 1,  5,  10,  21
            [Leaf].LeafCohortParameters.MaxArea.Vegetative_to_Flowering.MaxArea.XYPairs.Y = 224,  224,  489, 1080
            [Phenology].Vegetative.Target.FixedValue = 410
            [Phenology].Vegetative.Progression.PhotoperiodModifier.CriticalPhotoperiod = 11
        Cultivar 99_34C
          Command:
            [Leaf].LeafCohortParameters.MaxArea.Vegetative_to_Flowering.MaxArea.XYPairs.X = 1,  5,  10,  21
            [Leaf].LeafCohortParameters.MaxArea.Vegetative_to_Flowering.MaxArea.XYPairs.Y = 224,  224,  489, 1080
            [Phenology].Vegetative.Target.FixedValue = 420
            [Phenology].Vegetative.Progression.PhotoperiodModifier.CriticalPhotoperiod = 11
        Cultivar 98_79C: same as Replacements.Lentil.Archived Cultivars.99_66C
        Cultivar 98_55C: same as Replacements.Lentil.Archived Cultivars.99_66C
        Cultivar 98_16C
          Command:
            [Leaf].LeafCohortParameters.MaxArea.Vegetative_to_Flowering.MaxArea.XYPairs.X = 1,  5,  10,  21
            [Leaf].LeafCohortParameters.MaxArea.Vegetative_to_Flowering.MaxArea.XYPairs.Y = 224,  224,  489, 1080
            [Phenology].Vegetative.Target.FixedValue = 430
            [Phenology].Vegetative.Progression.PhotoperiodModifier.CriticalPhotoperiod = 10
        Cultivar 98_107C: same as Replacements.Lentil.Archived Cultivars.99_66C
        Cultivar 98_106C
          Command:
            [Leaf].LeafCohortParameters.MaxArea.Vegetative_to_Flowering.MaxArea.XYPairs.X = 1,  5,  10,  21
            [Leaf].LeafCohortParameters.MaxArea.Vegetative_to_Flowering.MaxArea.XYPairs.Y = 224,  224,  489, 1080
            [Phenology].Vegetative.Target.FixedValue = 400
            [Phenology].Vegetative.Progression.PhotoperiodModifier.CriticalPhotoperiod = 11
        Cultivar 97_219C
          Command:
            [Leaf].LeafCohortParameters.MaxArea.Vegetative_to_Flowering.MaxArea.XYPairs.X = 1,  5,  10,  21
            [Leaf].LeafCohortParameters.MaxArea.Vegetative_to_Flowering.MaxArea.XYPairs.Y = 224,  224,  489, 1080
            [Phenology].Vegetative.Target.FixedValue = 430
            [Phenology].Vegetative.Progression.PhotoperiodModifier.CriticalPhotoperiod = 11
        Cultivar 97_120C: same as Replacements.Lentil.Archived Cultivars.98_106C
        Cultivar 97_118C
          Command:
            [Leaf].LeafCohortParameters.MaxArea.Vegetative_to_Flowering.MaxArea.XYPairs.X = 1,  5,  10,  21
            [Leaf].LeafCohortParameters.MaxArea.Vegetative_to_Flowering.MaxArea.XYPairs.Y = 224,  224,  489, 1080
            [Phenology].Vegetative.Target.FixedValue = 420
            [Phenology].Vegetative.Progression.PhotoperiodModifier.CriticalPhotoperiod = 10.5
        Cultivar 97_116C
          Command:
            [Leaf].LeafCohortParameters.MaxArea.Vegetative_to_Flowering.MaxArea.XYPairs.X = 1,  5,  10,  21
            [Leaf].LeafCohortParameters.MaxArea.Vegetative_to_Flowering.MaxArea.XYPairs.Y = 224,  224,  489, 1080
            [Phenology].Vegetative.Target.FixedValue = 405
            [Phenology].Vegetative.Progression.PhotoperiodModifier.CriticalPhotoperiod = 10.5
        Cultivar 02_35C
          Command:
            [Leaf].LeafCohortParameters.MaxArea.Vegetative_to_Flowering.MaxArea.XYPairs.X = 1,  5,  10,  21
            [Leaf].LeafCohortParameters.MaxArea.Vegetative_to_Flowering.MaxArea.XYPairs.Y = 224,  224,  489, 1080
            [Phenology].Vegetative.Target.FixedValue = 505
            [Phenology].Vegetative.Progression.PhotoperiodModifier.CriticalPhotoperiod = 10.5
        Cultivar 02_30C: same as Replacements.Lentil.Archived Cultivars.98_106C
        Cultivar 02_23C: same as Replacements.Lentil.Archived Cultivars.98_106C
        Cultivar 02_10C
          Command:
            [Leaf].LeafCohortParameters.MaxArea.Vegetative_to_Flowering.MaxArea.XYPairs.X = 1,  5,  10,  21
            [Leaf].LeafCohortParameters.MaxArea.Vegetative_to_Flowering.MaxArea.XYPairs.Y = 224,  224,  489, 1080
            [Phenology].Vegetative.Target.FixedValue = 500
            [Phenology].Vegetative.Progression.PhotoperiodModifier.CriticalPhotoperiod = 10.5
        Cultivar 02_03C: same as Replacements.Lentil.Archived Cultivars.02_10C
        Cultivar 01_7C
          Command:
            [Leaf].LeafCohortParameters.MaxArea.Vegetative_to_Flowering.MaxArea.XYPairs.X = 1,  5,  10,  21
            [Leaf].LeafCohortParameters.MaxArea.Vegetative_to_Flowering.MaxArea.XYPairs.Y = 224,  224,  489, 1080
            [Phenology].Vegetative.Target.FixedValue = 485
            [Phenology].Vegetative.Progression.PhotoperiodModifier.CriticalPhotoperiod = 10.5
        Cultivar 01_61C: same as Replacements.Lentil.Archived Cultivars.02_10C
        Cultivar 01_36C
          Command:
            [Leaf].LeafCohortParameters.MaxArea.Vegetative_to_Flowering.MaxArea.XYPairs.X = 1,  5,  10,  21
            [Leaf].LeafCohortParameters.MaxArea.Vegetative_to_Flowering.MaxArea.XYPairs.Y = 224,  224,  489, 1080
            [Phenology].Vegetative.Target.FixedValue = 600
            [Phenology].Vegetative.Progression.PhotoperiodModifier.CriticalPhotoperiod = 10
        Cultivar 00_40C: same as Replacements.Lentil.Archived Cultivars.98_16C
        Cultivar 00_21C: same as Replacements.Lentil.Archived Cultivars.02_10C
        Cultivar Ghab4: same as Replacements.Lentil.Archived Cultivars.02_10C
        Cultivar Ghab5: same as Replacements.Lentil.Archived Cultivars.02_10C
        Cultivar Ghab3
          Command:
            [Leaf].LeafCohortParameters.MaxArea.Vegetative_to_Flowering.MaxArea.XYPairs.X = 1,  5,  10,  21
            [Leaf].LeafCohortParameters.MaxArea.Vegetative_to_Flowering.MaxArea.XYPairs.Y = 224,  224,  489, 1080
            [Phenology].Vegetative.Target.FixedValue = 510
            [Phenology].Vegetative.Progression.PhotoperiodModifier.CriticalPhotoperiod = 10.5
  Folder Soils
    Soil dooen: SoilType=Black Vertosol; Site=Jimbour; NearestTown=Jimbour, Q 4352; Region=South East Queensland; NaturalVegetation=Grassland, mainly Qld bluegrass; Latitude=0; Longitude=0; DataSource=Daniel Rodriguez lentil expt
      Physical
        Thickness  BD    AirDry  LL15   DUL    SAT
        100        1.2   0.1     0.145  0.384  0.54
        100        1.37  0.11    0.145  0.375  0.419
        200        1.28  0.14    0.197  0.405  0.487
        200        1.38  0.16    0.21   0.391  0.468
        200        1.4   0.19    0.24   0.373  0.449
        200        1.45  0.19    0.243  0.343  0.427
        200        1.45  0.19    0.28   0.32   0.389
        SoilCrop LentilSoil: LL=[0.145, 0.145, 0.197, 0.21, 0.24, 0.243, 0.28]; KL=[0.08, 0.08, 0.08, 0.08, 0.01, 0, 0]; XF=[1, 1, 1, 1, 0.1, 0, 0]
      WaterBalance SoilWater: SummerDate=1-Nov; SummerU=4; SummerCona=2; WinterDate=1-Apr; WinterU=4; WinterCona=2; DiffusConst=88; DiffusSlope=35.4; Salb=0.13; CN2Bare=72; CNRed=20; CNCov=0.8; PSIDul=-100; Thickness=[100, 100, 200, 200, 200, 200, 200]; SWCON=[0.2, 0.2, 0.2, 0.2, 0.2, 0.2, 0.2]
      CERESSoilTemperature Temperature
      Solute NO3: Thickness=[100, 100, 200, 200, 200, 200, 200]; InitialValues=[9.2, 7.6, 4.9, 2.7, 1.5, 1.8, 1.4]; InitialValuesUnits=ppm; WaterTableConcentration=0; D0=0; DepthConstant=0; MaxDepthSoluteAccessible=0; RunoffEffectivenessAtMovingSolute=0; MaxEffectiveRunoff=0
      Solute NH4: Thickness=[100, 100, 200, 200, 200, 200, 200]; InitialValues=[0.3, 0.29927, 0.30078125, 0.300725, 0.3, 0.5, 0.5]; InitialValuesUnits=ppm; WaterTableConcentration=0; D0=0; DepthConstant=0; MaxDepthSoluteAccessible=0; RunoffEffectivenessAtMovingSolute=0; MaxEffectiveRunoff=0
      Solute UREA: Thickness=[100, 100, 200, 200, 200, 200, 200]; InitialValues=[0, 0, 0, 0, 0, 0, 0]; InitialValuesUnits=kg/ha; WaterTableConcentration=0; D0=0; DepthConstant=0; MaxDepthSoluteAccessible=0; RunoffEffectivenessAtMovingSolute=0; MaxEffectiveRunoff=0
      Organic: FOMCNRatio=20; CarbonUnits=WalkleyBlack
        Thickness  Carbon  SoilCNRatio  FBiom  FInert  FOM
        100        1.12    14.5         0.02   0.36    347.129
        100        1.12    14.5         0.02   0.36    270.344
        200        0.77    14.5         0.015  0.5     163.972
        200        0.5     14.5         0.01   0.59    99.4541
        200        0.4     14.5         0.01   0.84    60.322
        200        0.28    14.5         0.01   0.8     36.5871
        200        0.23    14.5         0.01   0.8     22.1912
      Chemical: Thickness=[100, 100, 200, 200, 200, 200, 200]; PH=[8.2, 8.5, 9.1, 9.2, 8.9, 9.02, 9]; PHUnits=Water
      Water: Thickness=[100, 100, 200, 200, 200, 200, 200]; InitialValues=[0.15695, 0.1565, 0.2074, 0.21905, 0.24665, 0.248, 0.282]; InitialPAWmm=8.965; RelativeTo=LL15; FilledFromTop=false
      Nutrient
    Soil Beulah: SoilType=Black Vertosol; Site=Jimbour; NearestTown=Jimbour, Q 4352; Region=South East Queensland; NaturalVegetation=Grassland, mainly Qld bluegrass; Latitude=0; Longitude=0; DataSource=Daniel Rodriguez lentil expt
      Physical
        Thickness  BD    AirDry  LL15  DUL   SAT
        100        1.37  0.05    0.15  0.38  0.45
        100        1.37  0.05    0.22  0.38  0.45
        200        1.26  0.05    0.22  0.39  0.49
        200        1.35  0.05    0.26  0.38  0.46
        200        1.4   0.05    0.29  0.37  0.43
        200        1.45  0.05    0.33  0.36  0.42
        200        1.46  0.05    0.33  0.36  0.41
        SoilCrop LentilSoil: LL=[0.15, 0.22, 0.22, 0.26, 0.29, 0.33, 0.33]; KL=[0.08, 0.08, 0.08, 0.08, 0.01, 0, 0]; XF=[1, 1, 1, 1, 0, 0, 0]
      WaterBalance SoilWater: SummerDate=1-Nov; SummerU=4; SummerCona=2.5; WinterDate=1-Apr; WinterU=4; WinterCona=2.5; DiffusConst=88; DiffusSlope=35.4; Salb=0.13; CN2Bare=80; CNRed=20; CNCov=0.8; PSIDul=-100; Thickness=[100, 100, 200, 200, 200, 200, 200]; SWCON=[0.2, 0.2, 0.2, 0.2, 0.2, 0.2, 0.2]
      CERESSoilTemperature Temperature
      Solute NO3: Thickness=[100, 100, 200, 200, 200, 200, 200]; InitialValues=[33, 19.5, 13, 7, 2, 1, 0]; InitialValuesUnits=ppm; WaterTableConcentration=0; D0=0; DepthConstant=0; MaxDepthSoluteAccessible=0; RunoffEffectivenessAtMovingSolute=0; MaxEffectiveRunoff=0
      Solute NH4: Thickness=[100, 100, 200, 200, 200, 200, 200]; InitialValues=[0, 0, 0, 0, 0, 0, 0]; InitialValuesUnits=ppm; WaterTableConcentration=0; D0=0; DepthConstant=0; MaxDepthSoluteAccessible=0; RunoffEffectivenessAtMovingSolute=0; MaxEffectiveRunoff=0
      Solute UREA: same as Soils.dooen.UREA
      Organic: FOMCNRatio=40; CarbonUnits=WalkleyBlack
        Thickness  Carbon  SoilCNRatio  FBiom  FInert  FOM
        100        0.64    14.5         0.035  0.3     86.7823
        100        0.04    14.5         0.025  0.5     67.5861
        200        0.01    14.5         0.015  0.6     40.993
        200        0.01    14.5         0.01   0.75    24.8635
        200        0.01    14.5         0.01   0.9     15.0805
        200        0.01    14.5         0.01   0.99    9.14678
        200        0.01    14.5         0.01   0.99    5.5478
      Chemical: Thickness=[100, 100, 200, 200, 200, 200, 200]; PH=[8.8, 8.8, 8.8, 8.8, 8.7, 8.7, 8.7]; PHUnits=Water
      Water: Thickness=[100, 100, 200, 200, 200, 200, 200]; InitialValues=[0.173, 0.236, 0.237, 0.272, 0.298, 0.333, 0.333]; InitialPAWmm=12.5; RelativeTo=LL15; FilledFromTop=false
      Nutrient
    Soil FSbirchip: SoilType=Black Vertosol; Site=Jimbour; NearestTown=Jimbour, Q 4352; Region=South East Queensland; NaturalVegetation=Grassland, mainly Qld bluegrass; Latitude=0; Longitude=0; DataSource=Daniel Rodriguez lentil expt
      Physical
        Thickness  BD    AirDry  LL15   DUL    SAT
        100        1.33  0.1     0.12   0.379  0.498
        150        1.36  0.1     0.24   0.371  0.48
        150        1.39  0.1     0.31   0.384  0.46
        150        1.42  0.2     0.33   0.386  0.464
        150        1.44  0.2     0.38   0.381  0.457
        150        1.43  0.2     0.243  0.38   0.46
        300        1.41  0.2     0.28   0.39   0.468
        SoilCrop LentilSoil: LL=[0.12, 0.24, 0.31, 0.33, 0.38, 0.243, 0.28]; KL=[0.08, 0.08, 0.08, 0.08, 0.01, 0, 0]; XF=[1, 1, 1, 1, 0.1, 0, 0]
      WaterBalance SoilWater: SummerDate=1-Nov; SummerU=4; SummerCona=2.5; WinterDate=1-Apr; WinterU=4; WinterCona=2.5; DiffusConst=88; DiffusSlope=35.4; Salb=0.13; CN2Bare=80; CNRed=20; CNCov=0.8; PSIDul=-100; Thickness=[100, 150, 150, 150, 150, 150, 300]; SWCON=[0.2, 0.2, 0.2, 0.2, 0.2, 0.2, 0.2]
      CERESSoilTemperature Temperature
      Solute NO3: Thickness=[100, 150, 150, 150, 150, 150, 300]; InitialValues=[33, 19.5, 13, 7, 2, 1, 0]; InitialValuesUnits=ppm; WaterTableConcentration=0; D0=0; DepthConstant=0; MaxDepthSoluteAccessible=0; RunoffEffectivenessAtMovingSolute=0; MaxEffectiveRunoff=0
      Solute NH4: Thickness=[100, 150, 150, 150, 150, 150, 300]; InitialValues=[0, 0, 0, 0, 0, 0, 0]; InitialValuesUnits=ppm; WaterTableConcentration=0; D0=0; DepthConstant=0; MaxDepthSoluteAccessible=0; RunoffEffectivenessAtMovingSolute=0; MaxEffectiveRunoff=0
      Solute UREA: Thickness=[100, 150, 150, 150, 150, 150, 300]; InitialValues=[0, 0, 0, 0, 0, 0, 0]; InitialValuesUnits=kg/ha; WaterTableConcentration=0; D0=0; DepthConstant=0; MaxDepthSoluteAccessible=0; RunoffEffectivenessAtMovingSolute=0; MaxEffectiveRunoff=0
      Organic: FOMCNRatio=40; CarbonUnits=WalkleyBlack
        Thickness  Carbon  SoilCNRatio  FBiom  FInert  FOM
        100        0.64    14.5         0.035  0.3     87.4873
        150        0.04    14.5         0.025  0.5     59.1566
        150        0.01    14.5         0.015  0.6     40.0002
        150        0.01    14.5         0.01   0.75    27.0471
        150        0.01    14.5         0.01   0.9     18.2886
        150        0.01    14.5         0.01   0.99    12.3663
        300        0.01    14.5         0.01   0.99    5.654
      Chemical: Thickness=[100, 150, 150, 150, 150, 150, 300]; PH=[8.8, 8.8, 8.8, 8.8, 8.7, 8.7, 8.7]; PHUnits=Water
      Water: Thickness=[100, 150, 150, 150, 150, 150, 300]; InitialValues=[0.1459, 0.2531, 0.3174, 0.3356, 0.3801, 0.2567, 0.291]; InitialPAWmm=11.875; RelativeTo=LL15; FilledFromTop=false
      Nutrient
    Soil Vertosol No7 (PAWC-204 No519-Generic): ASCOrder=Vertosol; SoilType=Clay; Site=Generic-Qld; State=Generic; Country=Australia; NaturalVegetation=NA; ApsoilNumber=519-GENERIC; Latitude=-27.183286; Longitude=151.263748; LocationAccuracy=Regional Soil Type; DataSource=Generic soil. CSIRO Sustainable Ecosystems, Toowoomba
      Comments=Generic soil developed by Allan Peake. 'Typical Vertosol' soil properties have been calculated as the average of vertosols with similar characteristics from within the Apsoil database. Groupings were made on the basis of bulk density. Measured BD, DUL and CLL for the groups were then averaged to derive the characteristics of the typical Vertosols. They can then be used in conjunction with measured soil water to simplify the selection of appropriate Vertosols, for paddocks where full soil characterisations have not yet been completed. For more information see Peake et al. 2010: ‘A rapid method for estimating the plant available water capacity of Vertosols’, 2010 Australian Agronomy Conference. Typical Vertosols are different to 'Generic' soil types elsewhere in the Apsoil database, which are representative of certain soil types and districts, but have not been calculated from large numbers of similar, characterised soils.
      Physical
        Thickness  BD    AirDry  LL15   DUL    SAT
        150        1.33  0.109   0.217  0.418  0.468
        150        1.34  0.18    0.225  0.413  0.463
        300        1.34  0.244   0.244  0.414  0.464
        300        1.37  0.244   0.244  0.404  0.454
        300        1.41  0.244   0.244  0.39   0.44
        300        1.43  0.244   0.244  0.382  0.432
        300        1.44  0.244   0.244  0.377  0.427
        SoilCrop WheatSoil: LL=[0.217, 0.225, 0.244, 0.262, 0.294, 0.324, 0.356]; KL=[0.06, 0.06, 0.06, 0.04, 0.04, 0.02, 0.02]; XF=[1, 1, 1, 1, 1, 1, 1]
          LL source: Field measured and checked for sensibility
        SoilCrop LentilSoil: same as Soils.Vertosol No7 (PAWC-204 No519-Generic).Physical.WheatSoil
        SoilCrop CottonSoil: LL=[0.217, 0.225, 0.244, 0.262, 0.294, 0.324, 0.356]; KL=[0.1, 0.1, 0.1, 0.1, 0.09, 0.07, 0.05]; XF=[1, 1, 1, 1, 1, 1, 1]
          LL source: Field measured and checked for sensibility
        SoilCrop SorghumSoil: LL=[0.217, 0.225, 0.244, 0.262, 0.294, 0.324, 0.356]; KL=[0.07, 0.07, 0.07, 0.05, 0.05, 0.04, 0.03]; XF=[1, 1, 1, 1, 1, 1, 1]
          LL source: Field measured and checked for sensibility
      WaterBalance SoilWater: SummerDate=1-Nov; SummerU=6; SummerCona=3.5; WinterDate=1-Apr; WinterU=4; WinterCona=2.5; DiffusConst=40; DiffusSlope=16; Salb=0.12; CN2Bare=73; CNRed=20; CNCov=0.8; PSIDul=-100; Thickness=[150, 150, 300, 300, 300, 300, 300]; SWCON=[0.3, 0.3, 0.3, 0.3, 0.3, 0.3, 0.3]
      CERESSoilTemperature Temperature
      Solute NO3: Thickness=[150, 150, 300, 300, 300, 300, 300]; InitialValues=[10.5263, 3.48259, 0.870647, 0.851582, 0, 0, 0]; InitialValuesUnits=ppm; WaterTableConcentration=0; D0=0; DepthConstant=0; MaxDepthSoluteAccessible=0; RunoffEffectivenessAtMovingSolute=0; MaxEffectiveRunoff=0
      Solute NH4: Thickness=[150, 150, 300, 300, 300, 300, 300]; InitialValues=[0, 0, 0, 0, 0, 0, 0]; InitialValuesUnits=ppm; WaterTableConcentration=0; D0=0; DepthConstant=0; MaxDepthSoluteAccessible=0; RunoffEffectivenessAtMovingSolute=0; MaxEffectiveRunoff=0
      Solute UREA: Thickness=[150, 150, 300, 300, 300, 300, 300]; InitialValues=[0, 0, 0, 0, 0, 0, 0]; InitialValuesUnits=kg/ha; WaterTableConcentration=0; D0=0; DepthConstant=0; MaxDepthSoluteAccessible=0; RunoffEffectivenessAtMovingSolute=0; MaxEffectiveRunoff=0
      Organic: FOMCNRatio=40; CarbonUnits=WalkleyBlack
        Thickness  Carbon  SoilCNRatio  FBiom  FInert  FOM
        150        1       12           0.04   0.4     347.129
        150        0.8     12           0.02   0.6     270.344
        300        0.5     12           0.02   0.8     163.972
        300        0.25    12           0.02   1       99.4541
        300        0.15    12           0.01   1       60.322
        300        0.1     12           0.01   1       36.5871
        300        0.1     12           0.01   1       22.1912
      Chemical: Thickness=[150, 150, 300, 300, 300, 300, 300]; PH=[8.4, 8.6, 8.6, 8, 7.1, 6.5, 6.5]; PHUnits=Water
        PH source: Measured
      Water: Thickness=[150, 150, 300, 300, 300, 300, 300]; InitialValues=[0.418, 0.413, 0.414, 0.404, 0.39, 0.382, 0.377]; InitialPAWmm=282.45; RelativeTo=LL15; FilledFromTop=true
      Nutrient
    Soil Sandy Loam (Kerribee No359): ASCOrder=Calcarosol; SoilType=Sandy loam; Site=Kerribee; NearestTown=Paringi; Region=Lower Western; State=New South Wales; Country=Australia; NaturalVegetation=Belah and mallee; ApsoilNumber=359; Latitude=-34.288; Longitude=142.371; LocationAccuracy=+/- 20m
      DataSource=Based on Soil Characterisation undertaken by Whitbread/Davoren GRDC Soil water project and Jeff Baldock MSF data
      Physical
        Thickness  ParticleSizeClay  ParticleSizeSand  ParticleSizeSilt  BD     AirDry  LL15   DUL   SAT
        100        10.6              82.7              5.5               1.286  0.016   0.028  0.13  0.46
        100        15.2              76.9              5.9               1.529  0.048   0.065  0.17  0.37
        200        17.7              72.4              5.9               1.441  0.07    0.07   0.19  0.41
        200        21.9              63.9              4.7               1.486  0.1     0.1    0.22  0.39
        200        24.2              58.1              4.1               1.57   0.11    0.11   0.22  0.36
        200        22.1              59.6              4.1               1.626  0.11    0.11   0.21  0.32
        SoilCrop WheatSoil: LL=[0.028, 0.065, 0.1, 0.105, 0.11, 0.11]; KL=[0.06, 0.06, 0.06, 0.06, 0.04, 0.04]; XF=[1, 1, 1, 1, 1, 1]
        SoilCrop LentilSoil: LL=[0.028, 0.065, 0.1, 0.105, 0.11, 0.11]; KL=[0.06, 0.06, 0.06, 0.06, 0.04, 0.04]; XF=[1, 1, 1, 1, 1, 1]
        SoilCrop CanolaSoil: LL=[0.028, 0.065, 0.1, 0.115, 0.115, 0.13]; KL=[0.06, 0.06, 0.06, 0.06, 0.04, 0.04]; XF=[1, 1, 1, 1, 1, 1]
        SoilCrop FieldpeaSoil: LL=[0.028, 0.065, 0.1, 0.115, 0.115, 0.13]; KL=[0.06, 0.06, 0.06, 0.06, 0.04, 0.04]; XF=[1, 1, 1, 1, 1, 1]
        SoilCrop WeedSoil: LL=[0.05, 0.068, 0.09, 0.131, 0.139, 0.16]; KL=[0.06, 0.06, 0.06, 0.06, 0.04, 0.04]; XF=[1, 1, 1, 1, 1, 1]
      WaterBalance SoilWater: SummerDate=1-Nov; SummerU=4; SummerCona=2; WinterDate=1-Apr; WinterU=4; WinterCona=2; DiffusConst=88; DiffusSlope=35; Salb=0.13; CN2Bare=70; CNRed=20; CNCov=0.8; PSIDul=-100; Thickness=[100, 100, 200, 200, 200, 200]; SWCON=[0.7, 0.7, 0.7, 0.7, 0.7, 0.7]
      CERESSoilTemperature Temperature
      Solute NO3: Thickness=[100, 100, 200, 200, 200, 200]; InitialValues=[16.3297, 10.6824, 2.02406, 1.17766, 1.11465, 0.717507]; InitialValuesUnits=ppm; WaterTableConcentration=0; D0=0; DepthConstant=0; MaxDepthSoluteAccessible=0; RunoffEffectivenessAtMovingSolute=0; MaxEffectiveRunoff=0
      Solute NH4: Thickness=[100, 100, 200, 200, 200, 200]; InitialValues=[0, 0, 0, 0, 0, 0]; InitialValuesUnits=ppm; WaterTableConcentration=0; D0=0; DepthConstant=0; MaxDepthSoluteAccessible=0; RunoffEffectivenessAtMovingSolute=0; MaxEffectiveRunoff=0
      Solute UREA: Thickness=[100, 100, 200, 200, 200, 200]; InitialValues=[0, 0, 0, 0, 0, 0]; InitialValuesUnits=kg/ha; WaterTableConcentration=0; D0=0; DepthConstant=0; MaxDepthSoluteAccessible=0; RunoffEffectivenessAtMovingSolute=0; MaxEffectiveRunoff=0
      Organic: FOMCNRatio=40; CarbonUnits=Total
        Thickness  Carbon  SoilCNRatio  FBiom  FInert  FOM
        100        0.47    13.8         0.04   0.5     301.302
        100        0.37    13.8         0.02   0.6     246.685
        200        0.28    13.8         0.02   0.8     165.358
        200        0.23    13.8         0.02   1       110.843
        200        0.22    13.8         0.01   1       74.3001
        200        0.2     13.8         0.01   1       49.8049
      Chemical: PHUnits=Water
        Thickness  PH   EC
        100        7.1  0.1
        100        7.8  0.1
        200        8.1  0.1
        200        8.2  0.1
        200        8.4  0.2
        200        8.5  0.4
      Water: Thickness=[100, 100, 200, 200, 200, 200]; InitialValues=[0.13, 0.17, 0.19, 0.22, 0.22, 0.21]; InitialPAWmm=110.7; RelativeTo=LL15; FilledFromTop=true
      Nutrient
    Soil Vertosol No2 (PAWC-269 No514-Generic): ASCOrder=Vertosol; SoilType=Clay; Site=Generic-Qld; State=Generic; Country=Australia; NaturalVegetation=NA; ApsoilNumber=514-GENERIC; Latitude=-27.183286; Longitude=151.263748; LocationAccuracy=Regional Soil Type; DataSource=Generic soil. CSIRO Sustainable Ecosystems, Toowoomba
      Comments=Generic soil developed by Allan Peake. 'Typical Vertosol' soil properties have been calculated as the average of vertosols with similar characteristics from within the Apsoil database. Groupings were made on the basis of bulk density. Measured BD, DUL and CLL for the groups were then averaged to derive the characteristics of the typical Vertosols. They can then be used in conjunction with measured soil water to simplify the selection of appropriate Vertosols, for paddocks where full soil characterisations have not yet been completed. For more information see Peake et al. 2010: ‘A rapid method for estimating the plant available water capacity of Vertosols’, 2010 Australian Agronomy Conference. Typical Vertosols are different to 'Generic' soil types elsewhere in the Apsoil database, which are representative of certain soil types and districts, but have not been calculated from large numbers of similar, characterised soils.
      Physical
        Thickness  BD    AirDry  LL15   DUL    SAT
        150        1.06  0.13    0.259  0.519  0.569
        150        1.09  0.217   0.271  0.508  0.558
        300        1.11  0.295   0.295  0.501  0.551
        300        1.13  0.295   0.295  0.494  0.544
        300        1.18  0.295   0.295  0.474  0.524
        300        1.23  0.295   0.295  0.457  0.507
        300        1.25  0.295   0.295  0.45   0.5
        SoilCrop WheatSoil: LL=[0.259, 0.271, 0.295, 0.31, 0.34, 0.368, 0.414]; KL=[0.06, 0.06, 0.06, 0.04, 0.04, 0.02, 0.02]; XF=[1, 1, 1, 1, 1, 1, 1]
          LL source: Field measured and checked for sensibility
        SoilCrop LentilSoil: same as Soils.Vertosol No2 (PAWC-269 No514-Generic).Physical.WheatSoil
        SoilCrop CottonSoil: LL=[0.259, 0.271, 0.295, 0.31, 0.34, 0.368, 0.414]; KL=[0.1, 0.1, 0.1, 0.1, 0.09, 0.07, 0.05]; XF=[1, 1, 1, 1, 1, 1, 1]
          LL source: Field measured and checked for sensibility
        SoilCrop SorghumSoil: LL=[0.259, 0.271, 0.295, 0.31, 0.34, 0.368, 0.414]; KL=[0.07, 0.07, 0.07, 0.05, 0.05, 0.04, 0.03]; XF=[1, 1, 1, 1, 1, 1, 1]
          LL source: Field measured and checked for sensibility
      WaterBalance SoilWater: same as Soils.Vertosol No7 (PAWC-204 No519-Generic).SoilWater
      CERESSoilTemperature Temperature
      Solute NO3: Thickness=[150, 150, 300, 300, 300, 300, 300]; InitialValues=[26.4151, 8.56269, 2.1021, 2.0649, 0, 0, 0]; InitialValuesUnits=ppm; WaterTableConcentration=0; D0=0; DepthConstant=0; MaxDepthSoluteAccessible=0; RunoffEffectivenessAtMovingSolute=0; MaxEffectiveRunoff=0
      Solute NH4: same as Soils.Vertosol No7 (PAWC-204 No519-Generic).NH4
      Solute UREA: same as Soils.Vertosol No7 (PAWC-204 No519-Generic).UREA
      Organic: FOMCNRatio=40; CarbonUnits=WalkleyBlack
        Thickness  Carbon  SoilCNRatio  FBiom  FInert  FOM
        150        1.1     12           0.04   0.4     347.129
        150        0.88    12           0.02   0.6     270.344
        300        0.55    12           0.02   0.8     163.972
        300        0.275   12           0.02   1       99.4541
        300        0.165   12           0.01   1       60.322
        300        0.11    12           0.01   1       36.5871
        300        0.11    12           0.01   1       22.1912
      Chemical: Thickness=[150, 150, 300, 300, 300, 300, 300]; PH=[7.3, 7.7, 8.1, 8.5, 8.5, 8.6, 8.6]; PHUnits=Water
        PH source: Measured
      Water: Thickness=[150, 150, 300, 300, 300, 300, 300]; InitialValues=[0.519, 0.508, 0.501, 0.494, 0.474, 0.457, 0.45]; InitialPAWmm=344.85; RelativeTo=LL15; FilledFromTop=true
      Nutrient
    Soil Vertosol No11 (PAWC-136 No523-Generic): ASCOrder=Vertosol; SoilType=Clay; Site=Generic-Qld; State=Generic; Country=Australia; NaturalVegetation=NA; ApsoilNumber=523-GENERIC; Latitude=-27.183286; Longitude=151.263748; LocationAccuracy=Regional Soil Type; DataSource=Generic soil. CSIRO Sustainable Ecosystems, Toowoomba
      Comments=Generic soil developed by Allan Peake. 'Typical Vertosol' soil properties have been calculated as the average of vertosols with similar characteristics from within the Apsoil database. Groupings were made on the basis of bulk density. Measured BD, DUL and CLL for the groups were then averaged to derive the characteristics of the typical Vertosols. They can then be used in conjunction with measured soil water to simplify the selection of appropriate Vertosols, for paddocks where full soil characterisations have not yet been completed. For more information see Peake et al. 2010: ‘A rapid method for estimating the plant available water capacity of Vertosols’, 2010 Australian Agronomy Conference. Typical Vertosols are different to 'Generic' soil types elsewhere in the Apsoil database, which are representative of certain soil types and districts, but have not been calculated from large numbers of similar, characterised soils.
      Physical
        Thickness  BD    AirDry  LL15   DUL    SAT
        150        1.59  0.089   0.177  0.32   0.37
        150        1.62  0.14    0.175  0.308  0.358
        300        1.59  0.19    0.19   0.321  0.371
        300        1.58  0.19    0.19   0.322  0.372
        300        1.61  0.19    0.19   0.312  0.362
        300        1.64  0.19    0.19   0.301  0.351
        300        1.7   0.19    0.19   0.28   0.329
        SoilCrop WheatSoil: LL=[0.177, 0.175, 0.19, 0.22, 0.251, 0.278, 0.28]; KL=[0.06, 0.06, 0.06, 0.04, 0.04, 0.02, 0.02]; XF=[1, 1, 1, 1, 1, 1, 1]
          LL source: Field measured and checked for sensibility
        SoilCrop LentilSoil: same as Soils.Vertosol No11 (PAWC-136 No523-Generic).Physical.WheatSoil
        SoilCrop CottonSoil: LL=[0.177, 0.175, 0.19, 0.22, 0.251, 0.278, 0.28]; KL=[0.1, 0.1, 0.1, 0.1, 0.09, 0.07, 0.05]; XF=[1, 1, 1, 1, 1, 1, 1]
          LL source: Field measured and checked for sensibility
        SoilCrop SorghumSoil: LL=[0.177, 0.175, 0.19, 0.22, 0.251, 0.278, 0.28]; KL=[0.07, 0.07, 0.07, 0.05, 0.05, 0.04, 0.03]; XF=[1, 1, 1, 1, 1, 1, 1]
          LL source: Field measured and checked for sensibility
      WaterBalance SoilWater: SummerDate=1-Nov; SummerU=6; SummerCona=3.5; WinterDate=1-Apr; WinterU=4; WinterCona=2.5; DiffusConst=40; DiffusSlope=16; Salb=0.13; CN2Bare=73; CNRed=20; CNCov=0.8; PSIDul=-100; Thickness=[150, 150, 300, 300, 300, 300, 300]; SWCON=[0.3, 0.3, 0.3, 0.3, 0.3, 0.3, 0.3]
      CERESSoilTemperature Temperature
      Solute NO3: Thickness=[150, 150, 300, 300, 300, 300, 300]; InitialValues=[8.80503, 2.88066, 0.733753, 0.738397, 0, 0, 0]; InitialValuesUnits=ppm; WaterTableConcentration=0; D0=0; DepthConstant=0; MaxDepthSoluteAccessible=0; RunoffEffectivenessAtMovingSolute=0; MaxEffectiveRunoff=0
      Solute NH4: same as Soils.Vertosol No7 (PAWC-204 No519-Generic).NH4
      Solute UREA: same as Soils.Vertosol No7 (PAWC-204 No519-Generic).UREA
      Organic: FOMCNRatio=40; CarbonUnits=WalkleyBlack
        Thickness  Carbon  SoilCNRatio  FBiom  FInert  FOM
        150        0.9     12           0.04   0.4     347.129
        150        0.72    12           0.02   0.6     270.344
        300        0.45    12           0.02   0.8     163.972
        300        0.225   12           0.02   1       99.4541
        300        0.135   12           0.01   1       60.322
        300        0.09    12           0.01   1       36.5871
        300        0.09    12           0.01   1       22.1912
      Chemical: Thickness=[150, 150, 300, 300, 300, 300, 300]; PH=[8.1, 8.7, 8.9, 8, 7, 6.4, 5.8]; PHUnits=Water
        PH source: Estimated based on local knowledge
      Water: Thickness=[150, 150, 300, 300, 300, 300, 300]; InitialValues=[0.32, 0.308, 0.321, 0.322, 0.312, 0.301, 0.28]; InitialPAWmm=217.2; RelativeTo=LL15; FilledFromTop=true
      Nutrient
    Soil Greenethorpe_soil_2015: SoilType=SNSW; Site=Front paddock; NearestTown=Young; Region=Southern NSW; State=NSW; Latitude=0; Longitude=0; DataSource=Kirkegaard/Lilley
      Memo
        The soil for Greenethorpe was developed by Julianne Lilley:

        ''Hi Elizabeth,

        Laura and I did a bit of playing around with this soil as I initially adapted something from a Young soil that I had characterised. The simulation I took it from was called Y:\WORK\OCP modelling\Greenethorpe_Iandra\greenethorpe_2013 and was saved on 16 jan 2019 , so this may be the last file we used. Jeremy has also been simulating at the Iandra site, so he may be worth asking, but I know he is not back at work yet.  Anyway this soil will be a good place to start.

        Cheers
        Julianne"
      Physical
        Thickness  BD    AirDry  LL15   DUL    SAT
        100        1.5   0.08    0.08   0.25   0.28
        100        1.53  0.08    0.102  0.211  0.241
        200        1.56  0.1     0.156  0.232  0.262
        200        1.54  0.1     0.213  0.287  0.317
        200        1.54  0.15    0.241  0.311  0.341
        200        1.6   0.15    0.253  0.35   0.369
        200        1.62  0.15    0.258  0.35   0.369
        200        1.71  0.15    0.256  0.35   0.355
        200        1.69  0.15    0.268  0.35   0.357
        200        1.77  0.15    0.268  0.332  0.332
        200        1.7   0.15    0.268  0.335  0.344
        SoilCrop LentilSoil
          LL=[0.102, 0.102, 0.156, 0.213, 0.241, 0.253, 0.258, 0.256, 0.268, 0.268, 0.268]
          KL=[0.045, 0.045, 0.045, 0.045, 0.03, 0.03, 0.025, 0.02, 0.02, 0.01, 0.01]
          XF=[1, 1, 1, 1, 1, 1, 0, 0, 0, 0, 0]
        SoilCrop WheatSoil
          LL=[0.104, 0.137, 0.132, 0.178, 0.22, 0.23, 0.24, 0.25, 0.24, 0.27, 0.27]
          KL=[0.08, 0.08, 0.06, 0.05, 0.04, 0.04, 0.04, 0.03, 0.02, 0.01, 0.01]
          XF=[1, 1, 1, 1, 1, 1, 1, 1, 0.7, 0.5, 0]
        SoilCrop CanolaSoil
          LL=[0.104, 0.137, 0.132, 0.178, 0.22, 0.23, 0.24, 0.25, 0.24, 0.27, 0.27]
          KL=[0.08, 0.08, 0.06, 0.05, 0.04, 0.04, 0.04, 0.03, 0.02, 0.01, 0.01]
          XF=[1, 1, 1, 1, 1, 1, 1, 1, 0.7, 0.5, 0]
      WaterBalance SoilWater: SummerDate=1-nov; SummerU=6; SummerCona=3.5; WinterDate=1-apr; WinterU=2; WinterCona=2; DiffusConst=44; DiffusSlope=16; Salb=0.13; CN2Bare=72; CNRed=20; CNCov=0.8; PSIDul=-100
        Thickness=[100, 100, 100, 100, 100, 100, 100, 100, 100, 100, 100, 100, 100, 100, 100, 100, 100, 100, 100, 100, 500]
        SWCON=[0.8, 0.8, 0.8, 0.8, 0.8, 0.8, 0.8, 0.8, 0.8, 0.8, 0.8, 0.8, 0.8, 0.8, 0.8, 0.8, 0.6, 0.6, 0.6, 0.6, 0.6]
      CERESSoilTemperature Temperature
      Solute NO3: InitialValuesUnits=ppm; WaterTableConcentration=0; D0=0; DepthConstant=0; MaxDepthSoluteAccessible=0; RunoffEffectivenessAtMovingSolute=0; MaxEffectiveRunoff=0
        Thickness=[100, 100, 100, 100, 100, 100, 100, 100, 100, 100, 100, 100, 100, 100, 100, 100, 100, 100, 100, 100]
        InitialValues=[25.8, 10.1, 4.2, 4.2, 1.8, 1.8, 1.4, 1.4, 0.98, 0.98, 0.7, 0.7, 0.7, 0.7, 0.9, 0.9, 1.2, 1.2, 1.5, 1.5]
      Solute NH4: InitialValuesUnits=ppm; WaterTableConcentration=0; D0=0; DepthConstant=0; MaxDepthSoluteAccessible=0; RunoffEffectivenessAtMovingSolute=0; MaxEffectiveRunoff=0
        Thickness=[100, 100, 100, 100, 100, 100, 100, 100, 100, 100, 100, 100, 100, 100, 100, 100, 100, 100, 100, 100]
        InitialValues=[1.5, 0.35, 0.2, 0.2, 0.1, 0.1, 0.08, 0.08, 0.09, 0.09, 0.07, 0.07, 0.17, 0.17, 0.15, 0.15, 0.11, 0.11, 0.08, 0.08]
      Solute UREA: Thickness=[100, 100, 200, 200, 200, 200, 200, 200, 200, 200, 200]; InitialValues=[0, 0, 0, 0, 0, 0, 0, 0, 0, 0, 0]; InitialValuesUnits=kg/ha; WaterTableConcentration=0; D0=0; DepthConstant=0; MaxDepthSoluteAccessible=0; RunoffEffectivenessAtMovingSolute=0; MaxEffectiveRunoff=0
      Chemical: PHUnits=Water
        Thickness=[100, 100, 100, 100, 100, 100, 100, 100, 100, 100, 100, 100, 100, 100, 100, 100, 100, 100, 100, 100]
        PH=[5.8, 5.9, 6.6, 6.8, 7, 7.1, 7.2, 7.3, 7.4, 7.4, 7.6, 7.8, 8, 8.2, 8.3, 8.4, 8.4, 8.5, 8.5, 8.5]
      Organic: FOMCNRatio=60; CarbonUnits=Total
        Thickness  Carbon  SoilCNRatio  FBiom  FInert  FOM
        100        1       8            0.06   0.01    439.771
        100        0.35    8            0.05   0.01    378.514
        100        0.33    8            0.04   0.31    325.79
        100        0.22    8            0.03   0.35    280.41
        100        0.22    8            0.02   0.4     241.351
        100        0.22    8            0.01   0.45    207.733
        100        0.19    8            0.01   0.5     178.798
        100        0.17    8            0.01   0.6     153.892
        100        0.15    8            0.01   0.7     132.456
        100        0.12    8            0.01   0.8     114.006
        100        0.11    8            0.01   0.9     98.1262
        100        0.1     8            0.01   0.99    84.458
        100        0.1     8            0.01   0.99    72.6937
        100        0.1     8            0.01   0.99    62.568
        100        0.1     8            0.01   0.99    53.8528
        100        0.1     8            0.01   0.99    46.3515
        100        0.08    8            0.01   0.99    39.8951
        100        0.06    8            0.01   0.99    34.3381
        100        0.05    8            0.01   0.99    29.555
        100        0.04    8            0.01   0.99    25.4383
      Water: Thickness=[100, 100, 200, 200, 200, 200, 200, 200, 200, 200, 200]; InitialPAWmm=54.3; RelativeTo=LL15; FilledFromTop=false
        InitialValues=[0.181, 0.204, 0.262, 0.317, 0.31, 0.283, 0.269, 0.269, 0.241, 0.2, 0.2]
      Nutrient
    Soil Greenethorpe_soil_2019: SoilType=SNSW; Site=Front paddock; NearestTown=Young; Region=Southern NSW; State=NSW; Country=Australia; Latitude=0; Longitude=0; DataSource=Kirkegaard/Lilley
      Memo
        The soil for Greenethorpe was developed by Julianne Lilley:

        "Hi Elizabeth,

        Laura and I did a bit of playing around with this soil as I initially adapted something from a Young soil that I had characterised. The simulation I took it from was called Y:\WORK\OCP modelling\Greenethorpe_Iandra\greenethorpe_2013 and was saved on 16 jan 2019 , so this may be the last file we used. Jeremy has also been simulating at the Iandra site, so he may be worth asking, but I know he is not back at work yet.  Anyway this soil will be a good place to start.

        Cheers
        Julianne"

        **HOWEVER** this has not been added here yet. Julianne's version includes many narrow layers that I suspect will be inconsistent with the field data. So, JL's version may need to be altered.
      Physical
        Thickness  BD     AirDry  LL15   DUL    SAT
        100        1.5    0.08    0.08   0.25   0.28
        100        1.53   0.08    0.102  0.211  0.241
        200        1.56   0.1     0.156  0.232  0.262
        200        1.54   0.1     0.213  0.287  0.317
        200        1.54   0.15    0.241  0.311  0.341
        200        1.6    0.15    0.253  0.35   0.369
        200        1.62   0.15    0.258  0.35   0.369
        200        1.688  0.15    0.256  0.35   0.363
        200        1.69   0.15    0.268  0.35   0.357
        200        1.744  0.15    0.268  0.335  0.342
        200        1.7    0.15    0.268  0.335  0.344
        SoilCrop LentilSoil
          LL=[0.102, 0.102, 0.156, 0.213, 0.241, 0.253, 0.258, 0.256, 0.268, 0.268, 0.268]
          KL=[0.045, 0.045, 0.045, 0.045, 0.03, 0.02, 0.02, 0.02, 0.02, 0.01, 0.01]
          XF=[1, 1, 1, 1, 1, 1, 0, 0, 0, 0, 0]
          LL source: Field measured and checked for sensibility
      WaterBalance SoilWater: SummerDate=1-Nov; SummerU=6; SummerCona=3.5; WinterDate=1-Apr; WinterU=4; WinterCona=2.5; DiffusConst=40; DiffusSlope=16; Salb=0.12; CN2Bare=73; CNRed=20; CNCov=0.8; PSIDul=-100; Thickness=[100, 100, 200, 200, 200, 200, 200, 200, 200, 200, 200]; SWCON=[0.3, 0.3, 0.3, 0.3, 0.3, 0.3, 0.3, 0.3, 0.3, 0.3, 0.3]
      Organic: FOMCNRatio=40; CarbonUnits=Total
        Thickness  Carbon  SoilCNRatio  FBiom  FInert  FOM
        100        1       12           0.06   0.01    347.129
        100        0.35    12           0.05   0.01    270.344
        200        0.22    12           0.035  0.35    163.972
        200        0.22    12           0.015  0.425   99.454
        200        0.18    12           0.01   0.55    60.322
        200        0.135   12           0.01   0.75    36.587
        200        0.105   12           0.01   0.95    22.191
        200        0.1     12           0.01   0.99    22.191
        200        0.1     12           0.01   0.99    22.191
        200        0.07    12           0.01   0.99    22.191
        200        0.045   12           0.01   0.99    22.191
      Chemical: Thickness=[100, 100, 200, 200, 200, 200, 200, 200, 200, 200, 200]; PH=[5.8, 5.9, 6.7, 7.05, 7.25, 7.4, 7.7, 8.1, 8.35, 8.45, 8.5]; PHUnits=Water
      CERESSoilTemperature Temperature
      Water: Thickness=[100, 100, 200, 200, 200, 200, 200, 200, 200, 200, 200]; InitialPAWmm=54.3; RelativeTo=LL15; FilledFromTop=false
        InitialValues=[0.181, 0.204, 0.262, 0.317, 0.31, 0.283, 0.269, 0.269, 0.241, 0.2, 0.2]
      Solute NO3: Thickness=[100, 100, 200, 200, 200, 200, 200, 200, 200, 200, 200]; InitialValuesUnits=ppm; WaterTableConcentration=0; D0=0; DepthConstant=0; MaxDepthSoluteAccessible=0; RunoffEffectivenessAtMovingSolute=0; MaxEffectiveRunoff=0
        InitialValues=[38.7, 15.453, 13.104, 5.544, 4.312, 3.136, 2.268, 2.394, 3.042, 4.248, 5.1]
      Solute NH4: Thickness=[100, 100, 200, 200, 200, 200, 200, 200, 200, 200, 200]; InitialValuesUnits=ppm; WaterTableConcentration=0; D0=0; DepthConstant=0; MaxDepthSoluteAccessible=0; RunoffEffectivenessAtMovingSolute=0; MaxEffectiveRunoff=0
        InitialValues=[2.25, 0.536, 0.624, 0.308, 0.246, 0.288, 0.227, 0.581, 0.507, 0.389, 0.272]
      Solute Urea: same as Soils.Greenethorpe_soil_2015.UREA
      Nutrient
    Soil Greenethorpe_soil_2023: SoilType=SNSW; Site=Front paddock; NearestTown=Young; Region=Southern NSW; State=NSW; Country=Australia; Latitude=0; Longitude=0; DataSource=Kirkegaard/Lilley
      Memo
        This extends the 2019 soil onto another layer structure, and characterisation from lab data
      Physical
        Thickness  BD    AirDry  LL15  DUL   SAT
        100        1.38  0.09    0.1   0.23  0.43
        100        1.53  0.09    0.1   0.25  0.37
        300        1.55  0.09    0.13  0.3   0.37
        300        1.47  0.17    0.19  0.32  0.42
        300        1.48  0.21    0.21  0.32  0.41
        300        1.55  0.24    0.24  0.32  0.38
        300        1.57  0.25    0.25  0.33  0.38
        300        1.57  0.27    0.27  0.34  0.38
        SoilCrop LentilSoil: LL=[0.102, 0.102, 0.156, 0.213, 0.241, 0.253, 0.33, 0.34]; KL=[0.045, 0.045, 0.045, 0.045, 0.03, 0.02, 0, 0]; XF=[1, 1, 1, 1, 1, 1, 0, 0]
          LL source: Field measured and checked for sensibility
      WaterBalance SoilWater: SummerDate=1-Nov; SummerU=6; SummerCona=3.5; WinterDate=1-Apr; WinterU=4; WinterCona=2.5; DiffusConst=40; DiffusSlope=16; Salb=0.12; CN2Bare=73; CNRed=20; CNCov=0.8; PSIDul=-100; Thickness=[100, 100, 200, 200, 200, 200, 200, 200]; SWCON=[0.3, 0.3, 0.3, 0.3, 0.3, 0.3, 0.3, 0.3]
      Organic: FOMCNRatio=40; CarbonUnits=Total
        Thickness  Carbon  SoilCNRatio  FBiom  FInert  FOM
        100        1.02    12           0.06   0.01    347.129
        100        0.1     12           0.05   0.01    270.344
        300        0.13    12           0.035  0.35    163.972
        300        0.08    12           0.015  0.425   99.454
        300        0.06    12           0.01   0.55    60.322
        300        0.025   12           0.01   0.75    36.587
        300        0.025   12           0.01   0.95    22.191
        300        0.025   12           0.01   0.99    22.191
      Chemical: Thickness=[100, 100, 300, 300, 300, 300, 300, 300]; PH=[5.5, 6.2, 6.8, 7.2, 7.5, 8, 8, 8]; PHUnits=Water
      CERESSoilTemperature Temperature
      Water: Thickness=[100, 100, 300, 300, 300, 300, 300, 300]; InitialValues=[0.181, 0.204, 0.262, 0.317, 0.31, 0.283, 0.269, 0.27]; InitialPAWmm=144.8; RelativeTo=LL15; FilledFromTop=false
      Solute NO3: Thickness=[100, 100, 300, 300, 300, 300, 300, 300]; InitialValues=[38.7, 15.453, 13.104, 5.544, 4.312, 3.136, 2.268, 2.394]; InitialValuesUnits=ppm; WaterTableConcentration=0; D0=0; DepthConstant=0; MaxDepthSoluteAccessible=0; RunoffEffectivenessAtMovingSolute=0; MaxEffectiveRunoff=0
      Solute NH4: Thickness=[100, 100, 300, 300, 300, 300, 300, 300]; InitialValues=[2.25, 0.536, 0.624, 0.308, 0.246, 0.288, 0.227, 0.581]; InitialValuesUnits=ppm; WaterTableConcentration=0; D0=0; DepthConstant=0; MaxDepthSoluteAccessible=0; RunoffEffectivenessAtMovingSolute=0; MaxEffectiveRunoff=0
      Solute Urea: Thickness=[100, 100, 300, 300, 300, 300, 300, 300]; InitialValues=[0, 0, 0, 0, 0, 0, 0, 0]; InitialValuesUnits=kg/ha; WaterTableConcentration=0; D0=0; DepthConstant=0; MaxDepthSoluteAccessible=0; RunoffEffectivenessAtMovingSolute=0; MaxEffectiveRunoff=0
      Nutrient
  Memo NB
    Note observed (gatton, greenethorpe phen, mildura) is "50% budding"
  Memo NB
    Milmerran distinguishes between harvestmaturity & maturity.
  Memo NB
    Filtered to show only maturity weights
  Experiment base
    Factors
      Permutation
        Factor TOS
          CompositeFactor TOS1
            Specifications:
              [Manager].Script.TOS = TOS1
              [Manager].Script.sowDate = SowDateString
              [Clock].StartDate = StartDateString
          CompositeFactor TOS2
            Specifications:
              [Manager].Script.TOS = TOS2
              [Manager].Script.sowDate = SowDateString
              [Clock].StartDate = StartDateString
          CompositeFactor TOS3
            Specifications:
              [Manager].Script.TOS = TOS3
              [Manager].Script.sowDate = SowDateString
              [Clock].StartDate = StartDateString
          CompositeFactor TOS4
            Specifications:
              [Manager].Script.TOS = TOS4
              [Manager].Script.sowDate = SowDateString
              [Clock].StartDate = StartDateString
        Factor Cultivar: Specification=[Manager].Script.Cultivar = ReplacementText
        Factor Irr: Specification=[Manager].Script.Irr = ReplacementText
        Factor Pop: Specification=[Manager].Script.Population = ReplacementText
    Simulation base
      Clock: Start=2018-09-05; End=2019-03-05
      Summary
      Weather: FileName=Breeza1950_2020.met
      Manager PatchWeather
        patchFileName =
        date1 =
        date2 =
        PatchRain = True
        PatchMinT = True
        PatchMaxT = True
        PatchRadn = True
        PatchCO2 = False
        PatchVP = False
```csharp
using Models.Soils;
using System.Diagnostics;
using System.Collections.Generic;
using System.IO;
using System.Data;
using System.Linq;
using System;
using Models.Interfaces;
using Models.Core;
using Models.PMF;
using APSIM.Shared.Utilities;
namespace Models
{
    [Serializable]
    [System.Xml.Serialization.XmlInclude(typeof(Model))]
    public class Script : Model
    {
        [Link] Clock clock;
        [Link] IWeather weather;
        [Link] Simulation simulation;
        
        private DataTable data;
        private List<DateTime> dates = new List<DateTime>();
        private DateTime startDate;
        private DateTime endDate;

        [Description("Name of file containing weather data to patch:")]
        public string patchFileName { get; set; }

        [Description("Date to start patching weather data (can be blank):")]
        public string date1 { get; set; }

        [Description("Date to stop patching weather data: (can be blank)")]
        public string date2 { get; set; }

        [Separator("Which data items should be patched")]

        [Description("Patch 'Rain'?")] public bool PatchRain { get; set; }
        
        [Description("Patch 'MinT'?")] public bool PatchMinT { get; set; }

        [Description("Patch 'MaxT'?")] public bool PatchMaxT { get; set; }

        [Description("Patch 'Radn'?")] public bool PatchRadn { get; set; }

        [Description("Patch 'CO2'?")] public bool PatchCO2 { get; set; }

        [Description("Patch 'VP'?")] public bool PatchVP { get; set; }
        
        [EventSubscribe("StartOfSimulation")]
        private void OnStartOfSimulation(object sender, EventArgs e)
        {
            // Ensure filename is relative to the directory where the .apsimx file is located.
            string fullFileName = PathUtilities.GetAbsolutePath(patchFileName, simulation.FileName);
        
            // Read in data.
            data = ApsimTextFile.ToTable(fullFileName);
            foreach (DataRow row in data.Rows)
                dates.Add(DataTableUtilities.GetDateFromRow(row));
            
            // Ensure startDate and endDate always have a value.
            if (string.IsNullOrEmpty(date1))
                startDate = clock.StartDate;
            else
                startDate = DateTime.Parse(date1);

             if (string.IsNullOrEmpty(date2))
                endDate = clock.EndDate;
            else
                endDate = DateTime.Parse(date2);

        }

        [EventSubscribe("PreparingNewWeatherData")]
        private void OnPreparingNewWeatherData(object sender, EventArgs e)
        {
            if (clock.Today >= startDate && clock.Today <= endDate)
            {
                // check to see if we have a row of data for today.
                int rowIndex = dates.IndexOf(clock.Today);
                if (rowIndex != -1)
                {
                    // Yes we do have data for today so patch the data.
                    foreach (DataColumn column in data.Columns)
                    {
                        if (PatchRain && (column.ColumnName.Equals("patch_rain", StringComparison.InvariantCultureIgnoreCase))) 
                            weather.Rain = Convert.ToDouble(data.Rows[rowIndex][column.ColumnName]);
                        else if (PatchMinT && (column.ColumnName.Equals("patch_maxt", StringComparison.InvariantCultureIgnoreCase)))
                            weather.MaxT = Convert.ToDouble(data.Rows[rowIndex][column.ColumnName]);
                        else if (PatchMaxT && (column.ColumnName.Equals("patch_mint", StringComparison.InvariantCultureIgnoreCase)))
                            weather.MinT = Convert.ToDouble(data.Rows[rowIndex][column.ColumnName]);
                        else if ((PatchRadn && column.ColumnName.Equals("patch_radn", StringComparison.InvariantCultureIgnoreCase)))
                            weather.Radn = Convert.ToDouble(data.Rows[rowIndex][column.ColumnName]);
                    }
                }
            }
        }
    }
}
```
      SoilArbitrator
      Zone Paddock: Area=1; Slope=0; AspectAngle=0; Altitude=50
        Report Harvests: EventNames=[Lentil].Harvesting
          VariableNames:
            [Manager].Script.sowDate as sowDate
            [Clock].Today
            [Lentil].Phenology.CurrentStageName as Harvest
            [Lentil].AboveGround.Wt
            [Lentil].Grain.Wt
            [Lentil].Leaf.Wt
            [Lentil].Stem.Wt
            [Lentil].Shell.Wt
            divide([Lentil].Grain.Wt, [Lentil].AboveGround.Wt) as HarvestIndex
            [Lentil].Phenology.FloweringDAS as FloweringDAS
            [Lentil].Phenology.BuddingDAS as BuddingDAS
            [Lentil].Phenology.MaturityDAS as MaturityDAS
            [Lentil].Grain.Number
            [Lentil].Grain.Size as GrainSize
            //[Lentil].Leaf.NumberOfLeaves as LeafNo
            Max of [Lentil].LAI from [Lentil].Sowing to [Clock].Today as LAIMax
            First of Sum([Soil].NO3.kgha) from [Lentil].Sowing to [Clock].Today as NO3Sowing
            Sum([Soil].NO3.kgha) as NO3Harvest
        Report Daily: EventNames=[Clock].DoReport
          VariableNames:
            [Clock].Today
            [Lentil].DaysAfterSowing as DAS
            [Lentil].Phenology.CurrentPhaseName as PhaseName
            [Lentil].Phenology.CurrentStageName as StageName
            [Lentil].AboveGround.Wt
            //[Lentil].AboveGround.Wt * 10 as biomass_kgha
            [Lentil].Grain.Wt
            //[Lentil].Grain.Wt * 10 as yield_kgha
            [Lentil].Leaf.LAI as LAI
            [Leaf].WaterDemand as SWDemand
            [Leaf].WaterAllocation as Ep
            [Soil].SoilWater.Es as Es
            [Soil].SoilWater.ESW as ESW
            [Soil].SoilWater.SW as SW
            Sum([NO3].kgha) as NO3
            [Weather].Rain as Rain
            [Soil].SoilWater.Runoff as Runoff
            [Soil].SoilWater.Drainage as Drainage
            [Irrigation].IrrigationApplied as IrrigationApplied
        Report Static: EventNames=[Clock].StartOfSimulation
          VariableNames:
            [Manager].Script.Key as key
            [Soil].Physical.Thickness as dlayer
            [Soil].Physical.AirDry as AirDry
            [Soil].Physical.LL15 as LL15
            [LentilSoil].LL as CLL
            [Soil].Physical.DUL as DUL
            [Soil].Physical.SAT as SAT
        Irrigation
        Fertiliser
        Soil: SoilType=HMM; Site=HRS; NearestTown=Unknown; Region=SE Queensland; NaturalVegetation=Unknown; Latitude=0; Longitude=0
          Physical
            Thickness  BD    AirDry  LL15   DUL   SAT
            100        1.34  0.08    0.226  0.42  0.45
            100        1.34  0.19    0.226  0.42  0.45
            200        1.33  0.23    0.258  0.46  0.48
            200        1.38  0.26    0.27   0.46  0.47
            200        1.4   0.26    0.268  0.43  0.45
            200        1.55  0.28    0.304  0.4   0.41
            200        1.59  0.25    0.335  0.37  0.38
            200        1.63  0.28    0.33   0.33  0.37
            200        1.66  0.3     0.32   0.32  0.37
            200        1.68  0.31    0.33   0.33  0.36
            SoilCrop SorghumSoil
              LL=[0.226, 0.226, 0.258, 0.27, 0.268, 0.304, 0.335, 0.33, 0.32, 0.33]
              KL=[0.07, 0.07, 0.07, 0.07, 0.06, 0.06, 0.06, 0.05, 0.05, 0.04]
              XF=[1, 1, 1, 1, 1, 1, 1, 1, 1, 1]
          WaterBalance SoilWater: SummerDate=1-Nov; SummerU=1.5; SummerCona=6.5; WinterDate=1-Apr; WinterU=1.5; WinterCona=6.5; DiffusConst=40; DiffusSlope=16; Salb=0.2; CN2Bare=85; CNRed=20; CNCov=0.8; PSIDul=-100; Thickness=[100, 100, 200, 200, 200, 200, 200, 200, 200, 200]; SWCON=[0.3, 0.3, 0.3, 0.3, 0.3, 0.3, 0.3, 0.3, 0.3, 0.3]
          Nutrient
          Organic: FOMCNRatio=50; CarbonUnits=Total
            Thickness  Carbon  SoilCNRatio  FBiom  FInert  FOM
            100        1.19    12.5         0.05   0.45    260.587
            100        0.59    12.5         0.02   0.6     220.583
            200        0.45    12.5         0.01   0.75    158.054
            200        0.3     12.5         0.01   0.9     113.251
            200        0.2     12.5         0.01   0.9     81.148
            200        0.16    12.5         0.01   0.9     58.145
            200        0.17    12.5         0.01   0.9     41.663
            200        0.17    12.5         0.05   0.9     29.853
            200        0.17    12.5         0.02   0.9     21.39
            200        0.17    12.5         0.01   0.9     15.327
          Chemical: Thickness=[100, 100, 200, 200, 200, 200, 200, 200, 200, 200]; PH=[6.3, 6.4, 6.5, 6.6, 6.6, 6.5, 6.5, 6.5, 6.5, 6.5]; PHUnits=Water
          Water: Thickness=[100, 100, 200, 200, 200, 200, 200, 200, 200, 200]; InitialPAWmm=11.9; RelativeTo=LL15; FilledFromTop=false
            InitialValues=[0.235, 0.252, 0.27, 0.3, 0.268, 0.304, 0.335, 0.33, 0.32, 0.33]
          CERESSoilTemperature Temperature
          Solute NO3: Thickness=[150, 150, 300, 300, 300, 300, 300]; InitialValues=[70, 17, 1, 0, 0, 0, 0]; InitialValuesUnits=ppm; WaterTableConcentration=0; D0=0; DepthConstant=0; MaxDepthSoluteAccessible=0; RunoffEffectivenessAtMovingSolute=0; MaxEffectiveRunoff=0
          Solute NH4: same as Soils.Vertosol No7 (PAWC-204 No519-Generic).NH4
          Solute Urea: same as Soils.Vertosol No7 (PAWC-204 No519-Generic).UREA
        MicroClimate: a_interception=0; b_interception=1; c_interception=0; d_interception=0; SoilHeatFluxFraction=0.4; MinimumHeightDiffForNewLayer=0; NightInterceptionFraction=0.5; ReferenceHeight=2
        SurfaceOrganicMatter: InitialResidueName=wheat_stubble; InitialResidueType=wheat; InitialResidueMass=0; InitialStandingFraction=0; InitialCPR=0; InitialCNR=80
        Manager
          csvFile = /home/uqpdevo1/work/Projects/GRDC Pulse 2019/Lentil.operations.csv
          SiteName = junk
          Season = junk
          TOS = TOS1
          Cultivar = junk
          Irr =
          Population = 0
          SowingDepth = 30
          RowSpacing = 1000
```csharp
using System.IO;
using System.Collections.Generic;
using System.Text;
using System.Linq;
using System.Data;
using APSIM.Shared.Utilities;
using Models.Utilities;
using Models.Soils;
using Models.PMF;
using Models.Core;
using System;

namespace Models
{
    [Serializable]
    public class Script : Model
    {
        private IEnumerable<Overrides.Override> undos;

        [Link] Simulation Simulation;
        [Link] Clock Clock;
        [Link] Summary Summary;
        [Link] public Plant crop;
        [Link] Operations Operations;
        [Link(ByName=true)] private Water Water;
        [Link(ByName=true)] private Solute NO3; 
        [Link(ByName=true)] private Solute NH4; 
        [Link(ByName=true)] private Solute Urea; 
               
        public string Key { get; set; }
        
        [Description("Index table of experiment")]
        public string csvFile { get; set; }

        [Description("Site Name")]
        public string SiteName { get; set; }
                        
        [Description("Season")]
        public string Season { get; set; }
                        
        [Description("Time of Sowing (TOS1,2,3)")]
        public string TOS { get; set; }
        
        [Description("Cultivar")]
        public string Cultivar { get; set; }
         
        [Description("Irrigation")]
        public string Irr { get; set; }
         
        [Description("Sowing density (/m2)")]
        public double Population { get; set; } 

        [Description("Sowing depth (mm)")]
        public double SowingDepth { get; set; }
        

        [Description("Row spacing (mm)")]
        public double RowSpacing { get; set; }
        
        public string sowDate { get; set; }

        [EventSubscribe("Commencing")]
        private void OnSimulationCommencing(object sender, EventArgs e)
        {
            Key = Simulation.Name.ToLower(); //(SiteName + Season + TOS + "Cv" + Cultivar + Irr).ToLower();
            List<string> myCommands = new List<string>();
            List<Operation> myOperations = new List<Operation>();
                        
            using (StreamReader sr = new StreamReader(Path.GetDirectoryName(Simulation.FileName) + "/" + csvFile))
            {
                List<string> headers = SplitStringHonouringQuotes(sr.ReadLine(), ",");
                var idCol = headers.IndexOf("id");
                if (idCol < 0) {throw new Exception("Missing key id '" + Key + "'");}
                
                var dateCol = headers.IndexOf("date");
                if (dateCol < 0) {throw new Exception("Missing date column '" + Key + "'");}
                
                var cmdCol = headers.IndexOf("command");
                if (cmdCol < 0) {throw new Exception("Missing command column '" + Key + "'");}

                while (!sr.EndOfStream)
                {
                    string[] rows = SplitStringHonouringQuotes( sr.ReadLine(), "," ).ToArray();
                    var id = rows[idCol].ToLower();
                    if (id == Key &&
                        rows[dateCol].Replace("\"", "").ToLower() == "init") {
                        myCommands.Add(rows[cmdCol].Replace("\"", ""));
                    } else if (id == Key.ToLower()) {
                        var op = new Operation{Date = rows[dateCol], Action = rows[cmdCol].Replace("\"", "")};
                        myOperations.Add(op);
                    }
                }
             }

             if (myCommands.Count <= 0) {
                Summary.WriteMessage(this, "No commands for '" + Key + "'", MessageType.Information);
                Clock.EndDate = Clock.Today;
                //throw new Exception("No commands for '" + Key + "'");
             } else {
                Summary.WriteMessage(this, "Applying commands for '" + Key + "'\n" +
                                     string.Join("\n", myCommands), MessageType.Information);
                undos = Overrides.Apply(Simulation, Overrides.ParseStrings(myCommands.ToArray()));
             }
             
             
             if (myOperations.Count > 0) {
                 Summary.WriteMessage(this, "Setting operations for '" + Key + "'\n" +
                                      string.Join("\n", myOperations.Select(x => x.Date + " : " + x.Action)), 
                                      MessageType.Information);
               
                Operations.Operation = myOperations; // should check if nothign already there?
            }
        }

        [EventSubscribe("Completed")]
        private void OnSimulationCompleted(object sender, EventArgs e)
        {
            if (undos != null)
            {
                Overrides.Apply(Simulation, undos);
                undos = null;
            }
        }
               
        [EventSubscribe("DoManagement")]
        private void OnDoManagement(object sender, EventArgs e)
        {
          if (sowDate != null) {
            if (DateUtilities.DatesAreEqual(sowDate, Clock.Today) &&
                !crop.IsAlive )
            {
                   crop.Sow(population: Population, cultivar: Cultivar, depth: SowingDepth, rowSpacing: RowSpacing);
            }
          }
        }

        [Link(ByName=true)] private Report Daily;
        [EventSubscribe("DoReport")]
        private void OnDoReport(object sender, EventArgs e) {
            if (crop.IsAlive) 
               Daily.DoOutput();
        }
        
        [Link(ByName=true)] private Report Harvests;
        private bool hasReported = false;
        
        [EventSubscribe("EndOfDay")]
        private void OnDoCalculations(object sender, EventArgs e)
        {
            if (crop.IsReadyForHarvesting)
            {
                crop.Harvest();
                hasReported = true;
                crop.EndCrop();
                Clock.EndDate = Clock.Today;
            }
        }
        // Make sure something is written
        [EventSubscribe("EndOfSimulation")]
        private void OnEndOfSimulation(object sender, EventArgs e) 
        {
            if (!hasReported)
            {
                Harvests.DoOutput();
                hasReported = true;
            }
        }
        
                /// <summary>
        /// This method splits values on a comma but also honours double quotes
        /// ensuring something in double quotes is never split.
        ///     eg: if text = value1, "value 2, 2a", value3
        ///     then: words[0] = value1
        ///           words[1] = value2, 2a
        ///           words[2] = value3
        /// All values returned have been trimmed of spaces and double quotes.
        /// </summary>
        public List<string> SplitStringHonouringQuotes(string text, string delimiters)
        {
            List<string> ReturnStrings = new List<string>();
            if (text.Trim() == "")
                return ReturnStrings;

            bool InsideQuotes = false;
            int Start = IndexNotOfAny(text, " ".ToCharArray());
            for (int i = Start; i < text.Length; i++)
            {
                if (text[i] == '"')
                    InsideQuotes = !InsideQuotes; // toggle

                else if (!InsideQuotes)
                {
                    if (delimiters.IndexOf(text[i]) != -1)
                    {
                        // Found a word - store it.
                        if (Start != i)
                            ReturnStrings.Add(text.Substring(Start, i - Start).Trim(" ".ToCharArray()));
                        Start = i+1;

                    }
                }
            }
            if (Start != text.Length)
                ReturnStrings.Add(text.Substring(Start, text.Length - Start).Trim(" ".ToCharArray()));

            // remove leading and trailing quote if necessary.
            for (int i = 0; i < ReturnStrings.Count; i++)
            {
                if (ReturnStrings[i][0] == '"' && ReturnStrings[i][ReturnStrings[i].Length - 1] == '"')
                {
                    ReturnStrings[i] = ReturnStrings[i].Substring(1, ReturnStrings[i].Length - 2).Trim();
                    if (ReturnStrings[i] == "")
                    {
                        ReturnStrings.RemoveAt(i);
                        i--;
                    }
                }
            }
            return ReturnStrings;
        }
        public int IndexNotOfAny(string text, char[] delimiters)
        {
            return IndexNotOfAny(text, delimiters, 0);
        }

        /// <summary>
        /// This method complements the string function IndexOfAny by
        /// providing a NOT version. Returns -1 if non of the specified
        /// characters are found in specified string.
        /// </summary>
        public int IndexNotOfAny(string text, char[] delimiters, int pos)
        {
            string DelimitersString = new string(delimiters);
            for (int i = pos; i < text.Length; i++)
            {
                if (DelimitersString.IndexOf(text[i]) == -1)
                    return i;
            }
            return -1;
        }
   }
}
```
        Manager AutomaticIrrigation
          Crop = [Lentil]
          AutoIrrigationOn = False
          FASWThreshold = 0.9
          FASWDepth = 600
          weeks = 3
          afterSowing = 2
```csharp
using Models.Interfaces;
using System;
using System.Linq;
using Models.Core;
using System.Collections.Generic;
using System.Text;
using Models.Soils;
using Models.PMF;
using Models;
using System.Xml.Serialization;
using APSIM.Shared.Utilities;
using Models.Interfaces;
namespace Models
{
    [Serializable] 
    public class Script : Model
    {
        [Link] private Zone zone;
        [Link] private Irrigation irrigation;
        [Link] private ISoilWater waterBalance;
        [Link] private IPhysical soilPhysical;
        public double FASW { get; set; }
        public double WaterDeficit  { get; set; }
    


        [Description("Crop to irrigate")]
        public IPlant Crop { get; set; }
        
        [Description("Auto irrigation on?")]
        public bool AutoIrrigationOn { get; set; }

        [Description("Threshold fraction available water (0-1)")]
        public double FASWThreshold { get; set; }

        [Description("Soil depth (mm) to which fraction available water is calculated")]
        public double FASWDepth { get; set; }

        [Description("Minimum weeks between irrigations")]
        public double weeks { get; set; }

        [Description("Minimum days after sowing for first irrigation")]
        public int afterSowing { get; set; }

        private double irrigationGap = 0;    // gap between irrigations

        /// <summary>Called at start of simulation. Performs some basic error checking. </summary>
        [EventSubscribe("StartOfSimulation")]
        private void ErrorChecking(object sender, EventArgs args)
        {
            if (Crop == null)
                throw new Exception("No crop was specified in script " + Parent.Name);
        }

        [EventSubscribe("DoManagement")]
        private void OnDoManagement(object sender, EventArgs e)
        {
            if (AutoIrrigationOn && Crop.IsAlive)
            {
                   irrigationGap += 1;                // increment gap between irrigations
                CalculateFASW();                // calc FASW and WaterDeficit
                if ((FASW < FASWThreshold) && (irrigationGap >= weeks * 7))
                {
                    irrigation.Apply(WaterDeficit, depth: 0);
                    irrigationGap = 0;            // reset
                }
            }
            else
            {
                irrigationGap = weeks * 7 - afterSowing - 1;    // allow irrigation a number of days after it becomes alive/sown
            }
        }

        // Calculate the fraction of the potential available sw
        // Calculate the deficit amount from DUL
        private void CalculateFASW()
        {
            double[] LL15 = MathUtilities.Multiply(soilPhysical.LL15, soilPhysical.Thickness);
            double[] DUL = MathUtilities.Multiply(soilPhysical.DUL, soilPhysical.Thickness);
        
            int nlayr = GetLayerIndex(FASWDepth);
            double cumdep = MathUtilities.Sum(soilPhysical.Thickness, 0, nlayr, 0.0);    // tricky function that sums up to before nlayr

            double part_layer = MathUtilities.Divide((FASWDepth - cumdep), soilPhysical.Thickness[nlayr], 0.0);

            // note that results may be strange if swdep < ll15
            double avail_sw = (MathUtilities.Sum(waterBalance.SWmm, 0, nlayr, 0.0) + part_layer * waterBalance.SWmm[nlayr])
                            - (MathUtilities.Sum(LL15, 0, nlayr, 0.0) + part_layer * LL15[nlayr]);

            double pot_avail_sw = (MathUtilities.Sum(DUL, 0, nlayr, 0.0) + part_layer * DUL[nlayr])
                                - (MathUtilities.Sum(LL15, 0, nlayr, 0.0) + part_layer * LL15[nlayr]);
            
            FASW = MathUtilities.Divide(avail_sw, pot_avail_sw, 0.0);
            WaterDeficit = MathUtilities.Constrain(pot_avail_sw - avail_sw, 0.0, 100000);
        }

        // Get index of the layer that has this depth in it 
        private int GetLayerIndex(double pointDepth)
        {
            double[] cumThickness = soilPhysical.ThicknessCumulative;
            int layerIdx = 0;
            while ((layerIdx < cumThickness.Length) && (pointDepth > cumThickness[layerIdx]))
            {
                layerIdx += 1;
            }

            return layerIdx;
        }
    }
}
```
        Operations
        Plant Lentil: ResourceName=Mungbean
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