Simulations: Version=186
  Playlist: Text=*Precoz*
  DataStore
    ExcelInput: FileNames=[Observed.xlsx, CEData.xlsx]
      SheetNames=[Observed, Roberts_etal_1988, Roberts_etal_1986, Summerfield_etal_1985]
    PredictedObserved HarvestObsPred: PredictedTableName=HarvestReport; ObservedTableName=Observed; FieldNameUsedForMatch=SimulationName; FieldName2UsedForMatch=Lentil.Phenology.CurrentStageName; AllColumns=false
  Folder Replacements
    Plant Lentil: PlantType=Lentil
      Memo TitlePage
        The model consists of:

        * a phenology model to simulate development between growth phases
        * a structure model to simulate plant morphology
        * a collection of organs to simulate the various plant parts
        * an arbitrator to allocate resources (N, biomass) to the various plant organs
      OrganArbitrator Arbitrator
        BiomassTypeArbitrator DMArbitration
          Folder PotentialPartitioningMethods
            ReallocationMethod
            AllocateFixationMethod
            RetranslocationMethod
            SendPotentialDMAllocationsMethod
          Folder AllocationMethods
            NutrientConstrainedAllocationMethod
            DryMatterAllocationsMethod
          RelativeAllocation ArbitrationMethod
        BiomassTypeArbitrator NArbitration
          Folder PotentialPartitioningMethods
            ReallocationMethod
          Folder ActualPartitioningMethods
            AllocateFixationMethod
            RetranslocationMethod
          Folder AllocationMethods
            NitrogenAllocationsMethod
          RelativeAllocation ArbitrationMethod
          AllocateUptakesMethod
        WaterUptakeMethod
        NitrogenUptakeMethod
      Phenology
        Memo Introduction
          In the new model we simplified phenology by taking out stages that are not measurable (e.g. end of juvenile stage) and by adding new stages that are measurable (e.g. start pod).
          The new phenology follows the V/R staging system
        Constant JuvenileBase: FixedValue=400
        Constant VernSensitivity: FixedValue=0
        Constant InductiveBase: FixedValue=0
        Constant InductivePpSensitivity: FixedValue=0
        Constant EarlyReproductiveBase: FixedValue=200
        Constant EarlyReproductivePpSensitivity: FixedValue=0
        Constant GrainFillDuration: FixedValue=492; Units=oCd
        AccumulateFunction PreEmergenceTt: StartStageName=Germination; EndStageName=Vernalised; FractionRemovedOnCut=0; FractionRemovedOnHarvest=0; FractionRemovedOnGraze=0; FractionRemovedOnPrune=0
          LinearInterpolationFunction PreemergentThermalTime
            XYPairs: X=[0, 30, 50]; Y=[0, 30, 0]
            Memo
              These parameters are overridden by cultivar parameter descriptions to capture the difference between individual cultivars in terms of their phenological development.  Responses shown here are only indicative.  See cultivar descriptions for more information.
            VariableReference XValue: VariableName=[IWeather].MeanT
        PhaseLookup ThermalTime
          PhaseLookupValue PreEmergence: Start=Sowing; End=Emergence
            LinearInterpolationFunction PreemergentThermalTime: same as Replacements.Lentil.Phenology.PreEmergenceTt.PreemergentThermalTime
          PhaseLookupValue PostEmergence: Start=Emergence; End=StartFlowering
            MultiplyFunction DailyTt
              Memo Note
                WangEagleTempScale gives a value from 0 (at min and max temps) to 1 (at optTemp) and a beta function shape response in between.  This is multiplied by the optimum temperature to give thermal time in familuar unitis of oC per day.  This has the benefit of Tt targets being in familuar units, the shape of Tt response following a well justified pattern and three discrete parameters for thermal time that can be used for optimisation (as opposed to a Tt function in a linint function which is a more fiddly to optimise)
              SubDailyInterpolation WangEagleTempScale: agregationMethod=0
                WangEngelTempFunction Response: MinTemp=1.6; OptTemp=25; MaxTemp=36; RefTemp=0; MaximumTemperatureWeighting=0.5
                HourlySinPpAdjusted InterpolationMethod
                XYPairs LinearResponse: X=[0, 30, 40, -]; Y=[0, 30, 0, -]
              VariableReference OptTemp: VariableName=[DailyTt].WangEagleTempScale.Response.OptTemp
          PhaseLookupValue ReproductiveGrowth: Start=StartFlowering; End=HarvestRipe
            MultiplyFunction TT
              MultiplyFunction DailyTt: same as Replacements.Lentil.Phenology.ThermalTime.PostEmergence.DailyTt
              LinearInterpolationFunction PPModifier
                XYPairs: X=[13, 16, 20]; Y=[1, 1, 1]
                VariableReference XValue: VariableName=[Phenology].Photoperiod
        AccumulateFunction AccumulatedVernalisation: StartStageName=Germination; EndStageName=Vernalised; FractionRemovedOnCut=0; FractionRemovedOnHarvest=0; FractionRemovedOnGraze=0; FractionRemovedOnPrune=0
          SubDailyInterpolation DailyVernalisation: agregationMethod=0
            WangEngelTempFunction Response: MinTemp=0; OptTemp=4.7; MaxTemp=14; RefTemp=0; MaximumTemperatureWeighting=0.5
            HourlySinPpAdjusted InterpolationMethod
        LinearInterpolationFunction VernalisationSaturation
          XYPairs: X=[0, 10, 30, 60]; Y=[0, 0.5, 0.8, 1]
          Memo
            These parameters are overridden by cultivar parameter descriptions to capture the difference between individual cultivars in terms of their phenological development.  Responses shown here are only indicative.  See cultivar descriptions for more information.
          VariableReference XValue: VariableName=[Phenology].AccumulatedVernalisation
        PhotoperiodFunction Photoperiod: Twilight=-6; DayLength=0
        MovingAverageFunction PpResponse: NumberOfDays=100; StageToStartMovingAverage=Emergence
          LinearInterpolationFunction PpResponse
            XYPairs: X=[8, 16, -, -]; Y=[1, 0, -, -]
            VariableReference XValue: VariableName=[Lentil].Phenology.Photoperiod
        GerminatingPhase Germinating: Start=Sowing; End=Germination; IsEmerged=false
          Constant MinSoilTemperature: FixedValue=0
        EmergingPhase Emerging: Start=Germination; End=Emergence; IsEmerged=false; TTForTimeStep=0
          AddFunction Target
            Constant ShootLag: FixedValue=150
            MultiplyFunction DepthxRate
              VariableReference SowingDepth: VariableName=[Plant].SowingData.Depth
              Constant ShootRate: FixedValue=0
        GenericPhase Juvenile: Start=Emergence; End=Vernalised; IsEmerged=true
          VariableReference Progression: VariableName=[Phenology].ThermalTime
          AddFunction Target
            VariableReference JuvenileBase: VariableName=[Phenology].JuvenileBase
            MultiplyFunction NonVernalisationExtension
              MultiplyFunction PotentialVernalisationResponse
                Constant SpeciesMaxVernResponse: FixedValue=1000
                VariableReference GenotypeRelativeVernSensitivity: VariableName=[Phenology].VernSensitivity
              SubtractFunction NonVernalisation
                Constant: FixedValue=1
                VariableReference RelativeVernalisationSaturation: VariableName=[Phenology].VernalisationSaturation
        GenericPhase Inductive: Start=Vernalised; End=FirstBud; IsEmerged=true
          VariableReference Progression: VariableName=[Phenology].ThermalTime
          AddFunction Target
            VariableReference InductiveBase: VariableName=[Phenology].InductiveBase
            MultiplyFunction ShortPpExtension
              MultiplyFunction PotentialPpResponse
                Constant SpeciesMaxShortDayResponse: FixedValue=1000
                VariableReference GenotypeRelativePpSensitivity: VariableName=[Phenology].InductivePpSensitivity
              VariableReference PpResponse: VariableName=[Lentil].Phenology.PpResponse
        GenericPhase EarlyReprodictive: Start=FirstBud; End=StartFlowering; IsEmerged=true
          VariableReference Progression: VariableName=[Phenology].ThermalTime
          AddFunction Target
            VariableReference EarlyReproductiveBase: VariableName=[Phenology].EarlyReproductiveBase
            MultiplyFunction ShortDayExtension
              MultiplyFunction TargetAtShortPp
                Constant SpeciesMaxShortDayDuration: FixedValue=1000
                VariableReference GenotypeRelativePpSensitivity: VariableName=[Phenology].EarlyReproductivePpSensitivity
              VariableReference Shape: VariableName=[Lentil].Phenology.PpResponse
        GenericPhase EarlyFlowering: Start=StartFlowering; End=StartPodDevelopment; IsEmerged=true
          Constant Target: FixedValue=60
          VariableReference Progression: VariableName=[Phenology].ThermalTime
        GenericPhase EarlyPodDevelopment: Start=StartPodDevelopment; End=StartGrainFilling; IsEmerged=true
          Constant Target: FixedValue=97
          VariableReference Progression: VariableName=[Phenology].ThermalTime
        GenericPhase EarlyGrainFilling: Start=StartGrainFilling; End=EndCanopyDevelopment; IsEmerged=true
          MultiplyFunction Target
            Constant FractionofGrainfilling: FixedValue=0.05
            VariableReference EntireGrainfilling
              VariableName=[Phenology].LateGrainFilling.Target.EntireGrainfillPeriod.FixedValue
          VariableReference Progression: VariableName=[Phenology].ThermalTime
        GenericPhase MidGrainFilling: Start=EndCanopyDevelopment; End=EndPodDevelopment; IsEmerged=true
          MultiplyFunction Target
            Constant FractionofMidToLateGrainfilling: FixedValue=0.5
            SubtractFunction MidToLateGrainfilling
              VariableReference EntireGrainfilling
                VariableName=[Phenology].LateGrainFilling.Target.EntireGrainfillPeriod.FixedValue
              VariableReference EarlyGrainfilling: VariableName=[Phenology].EarlyGrainFilling.Target
          VariableReference Progression: VariableName=[Phenology].ThermalTime
        GenericPhase LateGrainFilling: Start=EndPodDevelopment; End=EndGrainFill; IsEmerged=true
          SubtractFunction Target
            Constant EntireGrainfillPeriod: FixedValue=300
            VariableReference EarlyGrainFillingTarget: VariableName=[Phenology].EarlyGrainFilling.Target
            VariableReference MidGrainFillingTarget: VariableName=[Phenology].MidGrainFilling.Target
          VariableReference Progression: VariableName=[Phenology].ThermalTime
        GenericPhase Maturing: Start=EndGrainFill; End=Maturity; IsEmerged=true
          Constant Target: FixedValue=4500
          VariableReference Progression: VariableName=[Phenology].ThermalTime
        GenericPhase Ripening: Start=Maturity; End=HarvestRipe; IsEmerged=true
          Constant Target: FixedValue=45
          VariableReference Progression: VariableName=[Phenology].ThermalTime
        EndPhase ReadyForHarvesting: Start=HarvestRipe; End=Unused; IsEmerged=true
          VariableReference ThermalTime: VariableName=[Phenology].ThermalTime
        OnEventFunction EmergenceDAS: SetEvent=Emergence; ReSetEvent=never
          Memo
            A function is used to provide maturity date as days after sowing(DAS).
          Constant PreEventValue: FixedValue=0
          VariableReference PostEventValue: VariableName=[Plant].DaysAfterSowing
        OnEventFunction StartBuddingDAS: SetEvent=FirstBud; ReSetEvent=never
          Memo
            A function is used to provide flowering date as days after sowing(DAS).
          Constant PreEventValue: FixedValue=0
          VariableReference PostEventValue: VariableName=[Plant].DaysAfterSowing
        OnEventFunction StartFloweringDAS: SetEvent=StartFlowering; ReSetEvent=never
          Memo
            A function is used to provide flowering date as days after sowing(DAS).
          Constant PreEventValue: FixedValue=0
          VariableReference PostEventValue: VariableName=[Plant].DaysAfterSowing
        OnEventFunction PodEmergenceDAS: SetEvent=StartPodDevelopment; ReSetEvent=never
          Memo
            A function is used to provide flowering date as days after sowing(DAS).
          Constant PreEventValue: FixedValue=0
          VariableReference PostEventValue: VariableName=[Plant].DaysAfterSowing
        OnEventFunction MaturityDAS: SetEvent=Maturity; ReSetEvent=never
          Memo
            A function is used to provide maturity date as days after sowing(DAS).
          Constant PreEventValue: FixedValue=0
          VariableReference PostEventValue: VariableName=[Plant].DaysAfterSowing
        AccumulateFunction DaysAfterEmergence: StartStageName=Emergence; EndStageName=HarvestRipe; FractionRemovedOnCut=0; FractionRemovedOnHarvest=0; FractionRemovedOnGraze=0; FractionRemovedOnPrune=0
          Constant OneDay: FixedValue=1
        OnEventFunction EmergenceTt: SetEvent=Emergence; ReSetEvent=never
          Memo
            A function is used to provide flowering date as days after sowing(DAS).
          Constant PreEventValue: FixedValue=0
          VariableReference PostEventValue: VariableName=[Phenology].AccumulatedTt
        OnEventFunction StartBuddingTt: SetEvent=StartBudding; ReSetEvent=never
          Memo
            A function is used to provide flowering date as days after sowing(DAS).
          Constant PreEventValue: FixedValue=0
          VariableReference PostEventValue: VariableName=[Phenology].AccumulatedTt
        OnEventFunction StartFloweringTt: SetEvent=StartFlowering; ReSetEvent=never
          Memo
            A function is used to provide flowering date as days after sowing(DAS).
          Constant PreEventValue: FixedValue=0
          VariableReference PostEventValue: VariableName=[Phenology].AccumulatedTt
        OnEventFunction PodEmergenceTt: SetEvent=StartPodDevelopment; ReSetEvent=never
          Memo
            A function is used to provide flowering date as days after sowing(DAS).
          Constant PreEventValue: FixedValue=0
          VariableReference PostEventValue: VariableName=[Phenology].AccumulatedTt
        OnEventFunction MaturityTt: SetEvent=Maturity; ReSetEvent=never
          Memo
            A function is used to provide flowering date as days after sowing(DAS).
          Constant PreEventValue: FixedValue=0
          VariableReference PostEventValue: VariableName=[Phenology].AccumulatedTt
      SimpleLeaf Leaf: Albedo=0.25; Gsmax350=0.011; R50=150; LeafInitialisationStage=Emergence; Height=0; BaseHeight=0; Width=0; FRGR=0; PotentialEP=0; WaterDemand=0; KDead=0.3; LAIDead=0
        AddFunction Area
          MultiplyFunction Initial
            Constant AreaPerPlant: FixedValue=0.0001
            VariableReference Population: VariableName=[Lentil].SowingData.Population
          SubtractFunction Change
            AccumulateAtEvent AreaGrowth: StartStageName=Emergence; EndStageName=EndCanopyDevelopment; AccumulateEventName=[Clock].DoActualPlantGrowth
              MultiplyFunction DeltaArea
                VariableReference DeltaMass: VariableName=[Leaf].Allocated.StructuralWt
                VariableReference SLA: VariableName=[Leaf].SpecificArea
            AccumulateAtEvent AreaLoss: StartStageName=EndCanopyDevelopment; EndStageName=HarvestRipe; AccumulateEventName=[Clock].DoActualPlantGrowth
              MultiplyFunction DeltaArea
                VariableReference DeltaMass: VariableName=[Leaf].Senesced.StructuralWt
                VariableReference SLA: VariableName=[Leaf].SpecificAreaCanopy
        Constant AreaLargestLeaf: FixedValue=0.0014
        BiomassRemoval BiomassRemovalDefaults: HarvestFractionLiveToRemove=0; HarvestFractionDeadToRemove=0; HarvestFractionLiveToResidue=1; HarvestFractionDeadToResidue=1
        AddFunction BranchNumber
          Constant One: FixedValue=1
          AccumulateFunction CumulativeBranching: StartStageName=Emergence; EndStageName=EndCanopyDevelopment; FractionRemovedOnCut=1; FractionRemovedOnHarvest=1; FractionRemovedOnGraze=1; FractionRemovedOnPrune=0
            MultiplyFunction DeltaBranch
              VariableReference DeltaNode: VariableName=[Leaf].NodeNumber.DeltaNode
              VariableReference BranchingRate: VariableName=[Leaf].BranchingRate
              LinearInterpolationFunction TemperatureFactor
                XYPairs: X=[20, 28, 32, 40]; Y=[1, 1, 1, 1]
                VariableReference XValue: VariableName=[IWeather].MeanT
              LinearInterpolationFunction WaterFactor
                XYPairs: X=[0.5, 1]; Y=[0, 1]
                VariableReference XValue: VariableName=[Leaf].Fw
              LinearInterpolationFunction CoverFactor
                XYPairs: X=[0, 0.33, 0.5, 1]; Y=[1, 1, 0, 0]
                VariableReference XValue: VariableName=[Leaf].CoverTotal
              LinearInterpolationFunction PPFactor
                XYPairs: X=[12, 13]; Y=[0, 1]
                VariableReference XValue: VariableName=[Phenology].Photoperiod
        LinearInterpolationFunction BranchingRate
          Memo
            From Hammer Paper
          XYPairs: X=[0, 1, 2, 3, 15, 16]; Y=[0, 2, 1, 0.5, 0.5, 0]
          VariableReference XValue: VariableName=[Leaf].NodeNumber
        Constant CarbonConcentration: FixedValue=0.4
        LinearInterpolationFunction CriticalNConc
          XYPairs: X=[3, 4, 9]; Y=[0.06, 0.05, 0.03]
          VariableReference XValue: VariableName=[Phenology].Stage
        PhaseLookup DeltaLAI
          PhaseLookupValue Vegetative: Start=Emergence; End=EndCanopyDevelopment
            MultiplyFunction Delta
              VariableReference AreaLargestLeaf: VariableName=[Leaf].AreaLargestLeaf
              PhaseLookup RelativeArea
                PhaseLookupValue BeforeEndPod: Start=Emergence; End=StartPodDevelopment
                  LinearInterpolationFunction RelativeArea
                    Memo
                      This approach is based upon that used in [robertson_simulation_2002].
                    XYPairs: X=[2, 4, 6, 7, 10]; Y=[0.5, 1, 1, 1, 1]
                    VariableReference XValue: VariableName=[Leaf].NodeNumber
                PhaseLookupValue AfterEndPod: Start=StartPodDevelopment; End=EndCanopyDevelopment
                  Constant RelativeArea: FixedValue=1
              VariableReference PlantNumber: VariableName=[Lentil].SowingData.Population
              VariableReference BranchNumber: VariableName=[Leaf].BranchNumber
              DivideFunction LAR
                VariableReference TT: VariableName=[Phenology].ThermalTime
                VariableReference Phyllochron: VariableName=[Leaf].Phyllochron
              LinearInterpolationFunction LeafSizeTemperatureFactor
                XYPairs: X=[20, 22, 32, 40]; Y=[1, 1, 1, 0]
                VariableReference XValue: VariableName=[IWeather].MeanT
          PhaseLookupValue Reproductive: Start=EndCanopyDevelopment; End=Maturity
            Constant: FixedValue=0
        Constant DetachmentRate: FixedValue=0.05; Units=/d
        Constant DMConversionEfficiency: FixedValue=1; Units=0-1
        NutrientDemandFunctions DMDemands
          DivideFunction Structural
            VariableReference DeltaLAI: VariableName=[Leaf].DeltaLAI
            VariableReference SLA: VariableName=[Leaf].SpecificArea
            Memo
              Growth in leaf area is used to calculate the leaf dry matter demand.  Note that leaf biomass is assumed to consist of entirely structural dry matter.
          Constant Storage: FixedValue=0
          Constant Metabolic: FixedValue=0
          Constant QStructuralPriority: FixedValue=1
          Constant QMetabolicPriority: FixedValue=1
          Constant QStoragePriority: FixedValue=1
        Constant DMReallocationFactor: FixedValue=0
        Constant DMRetranslocationFactor: FixedValue=0.5
        LinearInterpolationFunction ExtinctionCoefficient
          Memo
            This approach is based upon that described by [Porter2000PhD] to account for the impacts of population and row/plant spacing.  Extinction coefficient is said to decrease with decreasing inter-plant spacing within the plant row.
          XYPairs: X=[0, 335]; Y=[0.214, 0.7]
          ExpressionFunction XValue
            Expression=divide(divide(1000000,[Lentil].SowingData.Population),[Lentil].SowingData.RowSpacing)
        MinimumFunction FRGR
          VariableReference RUE_FT: VariableName=[Leaf].Photosynthesis.FT
          MinimumFunction Others
            VariableReference RUE_FN: VariableName=[Leaf].Photosynthesis.FN
            VariableReference RUE_FVPD: VariableName=[Leaf].Photosynthesis.FVPD
        LinearInterpolationFunction HeightFunction
          XYPairs: X=[1, 2, 3, 4, 5, 6, 9]; Y=[0, 0, 50, 400, 450, 450, 450]
          VariableReference XValue: VariableName=[Phenology].Stage
        MultiplyFunction InitialWt
          Constant MassPerPlant: FixedValue=0.06
          VariableReference Population: VariableName=[Lentil].SowingData.Population
        MultiplyFunction LAIDead
          VariableReference SLA: VariableName=[Leaf].SpecificAreaCanopy
          VariableReference LeafDeadWt: VariableName=[Leaf].Dead.Wt
        Constant MaintenanceRespiration: FixedValue=0; Units=0-1
        LinearInterpolationFunction MaximumNConc
          XYPairs: X=[3, 4, 9]; Y=[0.06, 0.05, 0.03]
          VariableReference XValue: VariableName=[Phenology].Stage
        Constant MinimumNConc: FixedValue=0.02
        NutrientDemandFunctions NDemands
          MultiplyFunction Structural
            VariableReference MinNconc: VariableName=[Leaf].minimumNconc
            VariableReference PotentialDMAllocation: VariableName=[Leaf].potentialDMAllocation.Structural
          MultiplyFunction Metabolic
            SubtractFunction MetabolicNconc
              VariableReference CritNconc: VariableName=[Leaf].criticalNConc
              VariableReference MinNconc: VariableName=[Leaf].minimumNconc
            VariableReference PotentialDMAllocation: VariableName=[Leaf].potentialDMAllocation.Structural
          StorageNDemandFunction Storage
            Constant NitrogenDemandSwitch: FixedValue=1
            VariableReference MaxNconc: VariableName=[Leaf].maximumNconc
          Constant QStructuralPriority: FixedValue=1
          Constant QMetabolicPriority: FixedValue=1
          Constant QStoragePriority: FixedValue=1
        AccumulateFunction NodeNumber: StartStageName=Emergence; EndStageName=EndCanopyDevelopment; FractionRemovedOnCut=1; FractionRemovedOnHarvest=1; FractionRemovedOnGraze=1; FractionRemovedOnPrune=0
          DivideFunction DeltaNode
            VariableReference ThermalTime: VariableName=[Phenology].ThermalTime
            VariableReference Phyllochron: VariableName=[Leaf].Phyllochron
        Constant NReallocationFactor: FixedValue=1
          Memo
            This model assumes that all metabolic and storage N is available for reallocation from senescing leaves.
        Constant NRetranslocationFactor: FixedValue=0.5
        AccumulateFunction Number: StartStageName=Emergence; EndStageName=EndCanopyDevelopment; FractionRemovedOnCut=1; FractionRemovedOnHarvest=1; FractionRemovedOnGraze=1; FractionRemovedOnPrune=0
          MultiplyFunction DailyNumberIncrease
            VariableReference DeltaNode: VariableName=[Leaf].NodeNumber.DeltaNode
            VariableReference BranchNumber: VariableName=[Leaf].BranchNumber
            VariableReference PlantNumber: VariableName=[Lentil].SowingData.Population
        Constant RemobilisationCost: FixedValue=0
        RUEModel Photosynthesis
          Constant RUE: FixedValue=1.5
            Memo
              This approach is based upon the value used in [robertson_simulation_2002] increased to account for partitioning to roots.
          WeightedTemperatureFunction FT: MaximumTemperatureWeighting=0.75
            Memo
              This approach is based upon that used in Bell, WRight and Hammer (1992) Crop Sci
            XYPairs: X=[10, 21, 35, 40]; Y=[0, 1, 1, 0]
          LinearInterpolationFunction FVPD
            XYPairs: X=[0, 10, 50]; Y=[1, 1, 1]
            VariableReference XValue: VariableName=[Leaf].Photosynthesis.VPD
          LinearInterpolationFunction FN
            XYPairs: X=[0, 1, 1.5]; Y=[0, 1, 1]
            VariableReference XValue: VariableName=[Leaf].Fn
          LinearInterpolationFunction FW
            XYPairs: X=[0, 1]; Y=[0, 1]
            VariableReference XValue: VariableName=[Leaf].Fw
          RUECO2Function FCO2: PhotosyntheticPathway=C3
          VariableReference RadnInt: VariableName=[Leaf].RadiationIntercepted
        PhaseLookup Phyllochron
          PhaseLookupValue EarlyVegetative: Start=Emergence; End=StartGrainFilling
            Constant Phyllochron: FixedValue=56
              Memo
                This value is based upon that used in [robertson_simulation_2002].
          PhaseLookupValue LateVegetative: Start=StartGrainFilling; End=EndCanopyDevelopment
            MultiplyFunction Phyllochron
              Constant Base: FixedValue=56
                Memo
                  This value is based upon that used in [robertson_simulation_2002].
              LinearInterpolationFunction PPFactor
                XYPairs: X=[10, 12, 12.8, 14]; Y=[10, 10, 1, 1]
                VariableReference XValue: VariableName=[Phenology].Photoperiod
          PhaseLookupValue Reproductive: Start=EndCanopyDevelopment; End=Maturity
            Constant: FixedValue=0
        PhaseLookup SenescenceRate
          PhaseLookupValue Vegetative: Start=Emergence; End=EndPodDevelopment
            Constant Rate: FixedValue=0
          PhaseLookupValue Reproductive: Start=EndPodDevelopment; End=Maturity
            Memo
              Leaf senescence rate is calculated to ensure that all leaves are senesced by crop maturity.
            DivideFunction Rate
              VariableReference TT: VariableName=[Phenology].ThermalTime
              SubtractFunction TTRemaining
                ExpressionFunction TTRequired
                  Expression=[Phenology].LateGrainFilling.Target + [Phenology].Maturing.Target + 1000
                ExpressionFunction TTComplete
                  Expression=[Phenology].LateGrainFilling.ProgressThroughPhase + [Phenology].Maturing.ProgressThroughPhase
              Constant Modifier: FixedValue=1
          PhaseLookupValue Senescent: Start=Maturity; End=HarvestRipe
            Memo
              Leaf senescence rate is calculated to ensure that all leaves are senesced by crop maturity.
            Constant Rate: FixedValue=0.1
        LinearInterpolationFunction SpecificArea
          XYPairs: X=[0, 17, 21, 35]; Y=[0.027, 0.027, 0.027, 0.027]
          VariableReference XValue: VariableName=[IWeather].MinT
        StomatalConductanceCO2Modifier
          VariableReference PhotosynthesisCO2Modifier: VariableName=[Leaf].Photosynthesis.FCO2
        DivideFunction SpecificAreaCanopy
          VariableReference LAI: VariableName=[Leaf].Area
          VariableReference LeafWt: VariableName=[Leaf].Live.Wt
      ReproductiveOrgan Grain: GrowthRespiration=0; MaintenanceRespiration=0
        Biomass Live
        Biomass Dead
        BiomassRemoval BiomassRemovalDefaults: HarvestFractionLiveToRemove=1; HarvestFractionDeadToRemove=1; HarvestFractionLiveToResidue=0; HarvestFractionDeadToResidue=0
        Constant CarbonConcentration: FixedValue=0.4
        Constant DMConversionEfficiency: FixedValue=0.89
        PhaseLookup DMDemandFunction
          PhaseLookupValue GrainFilling: Start=StartGrainFilling; End=EndGrainFill
            MultiplyFunction HIGrainDemand
              VariableReference AboveGroundWt: VariableName=[AboveGround].Wt
              DivideFunction HarvestIndexIncrease
                MaximumFunction OutstandingHarvestIndexIncrease
                  ExpressionFunction Increase: Expression=[Grain].PotentialHarvestIndex - [Grain].HarvestIndex
                  Constant Zero: FixedValue=0
                SubtractFunction TTRemaining
                  ExpressionFunction ReproductiveTT
                    Expression=[Phenology].EarlyGrainFilling.Target+[Phenology].MidGrainFilling.Target+[Phenology].LateGrainFilling.Target
                  ExpressionFunction ReproductiveTTComplete
                    Expression=[Phenology].EarlyGrainFilling.ProgressThroughPhase+[Phenology].MidGrainFilling.ProgressThroughPhase+[Phenology].LateGrainFilling.ProgressThroughPhase
              VariableReference ThermalTime: VariableName=[Phenology].ThermalTime
        NutrientPoolFunctions DMDemandPriorityFactors
          Constant Structural: FixedValue=1
          Constant Metabolic: FixedValue=1
          Constant Storage: FixedValue=1
        AddFunction FillingDuration
          VariableReference EarlyGrainFillingDuration: VariableName=[Phenology].EarlyGrainFilling.Target
          VariableReference MidGrainFillingDuration: VariableName=[Phenology].MidGrainFilling.Target
          VariableReference LateGrainFillingDuration: VariableName=[Phenology].LateGrainFilling.Target
        DivideFunction HarvestIndex
          VariableReference GrainWt: VariableName=[Grain].Wt
          VariableReference AboveGroundWt: VariableName=[AboveGround].Wt
        Constant MaximumNConc: FixedValue=0.058
        Constant MaximumPotentialGrainSize: FixedValue=0.05
          Memo
            This parameter is not used.  Grain growth is calculated from harvest index increase.
        Constant MinimumNConc: FixedValue=0.05
        NutrientPoolFunctions NDemandPriorityFactors: same as Replacements.Lentil.Grain.DMDemandPriorityFactors
        MultiplyFunction NFillingRate
          VariableReference NConc: VariableName=[Grain].MaximumNConc
          VariableReference DMDemand: VariableName=[Grain].DMDemandFunction
          VariableReference DMConversionEfficiency: VariableName=[Grain].DMConversionEfficiency
        Constant NumberFunction: FixedValue=0
          Memo
            Grain number is not estimated by this model.
        MultiplyFunction PotentialHarvestIndex
          VariableReference PodHarvestIndex: VariableName=[Pod].PotentialHarvestIndex
          Constant GrainFraction: FixedValue=0.72; Units=0-1
        Constant RemobilisationCost: FixedValue=0
        Constant WaterContent: FixedValue=0.13
      Root: GrowthRespiration=0; MaintenanceRespiration=0
        BiomassRemoval BiomassRemovalDefaults: HarvestFractionLiveToRemove=0; HarvestFractionDeadToRemove=0; HarvestFractionLiveToResidue=0.2; HarvestFractionDeadToResidue=0
        Constant CarbonConcentration: FixedValue=0.4
        VariableReference CriticalNConc: VariableName=[Root].MinimumNConc
        Constant DMConversionEfficiency: FixedValue=1
        NutrientDemandFunctions DMDemands
          MultiplyFunction Structural
            PartitionFractionDemandFunction DMDemandFunction
              PhaseLookup PartitionFraction
                PhaseLookupValue Early: Start=Emergence; End=StartFlowering
                  Constant Function: FixedValue=0.2
                PhaseLookupValue Middle: Start=StartFlowering; End=StartGrainFilling
                  Constant Function: FixedValue=0.2
                PhaseLookupValue Late: Start=StartGrainFilling; End=Maturity
                  Constant Function: FixedValue=0.05
            Constant StructuralFraction: FixedValue=1
          Constant Metabolic: FixedValue=0
          StorageDMDemandFunction Storage
            SubtractFunction StorageFraction
              Constant One: FixedValue=1
              VariableReference StructuralFraction: VariableName=[Root].DMDemands.Structural.StructuralFraction
          Constant QStructuralPriority: FixedValue=1
          Constant QMetabolicPriority: FixedValue=1
          Constant QStoragePriority: FixedValue=1
        NutrientPoolFunctions InitialWt
          Constant Structural: FixedValue=0.1; Units=g/plant
          Constant Metabolic: FixedValue=0
          Constant Storage: FixedValue=0
        LinearInterpolationFunction KLModifier
          XYPairs: X=[0, 3]; Y=[1, 1]
          VariableReference XValue: VariableName=[Leaf].LAI
        Constant KNO3: FixedValue=0.02
        Constant KNH4: FixedValue=0
          Memo
            The current model version considers only NO3 uptake but NH4 option can be activated by the user . We do not expect activation of NH4 to change total plant N uptake because the nitrification rate (conversion of NH4 to NO3) is very fast in the model. In the future we will re-valuate this.
        LinearInterpolationFunction MaxDailyNUptake
          XYPairs: X=[0, 5]; Y=[1, 3]
          VariableReference XValue: VariableName=[Leaf].LAI
        Constant MaintenanceRespirationFunction: FixedValue=1
        Constant MinimumNConc: FixedValue=0.005
        Constant MaximumNConc: FixedValue=0.01
        Constant MaximumRootDepth: FixedValue=1000000
        PhaseLookupValue NitrogenDemandSwitch: Start=Emergence; End=EndGrainFill
          Constant: FixedValue=1
        NutrientDemandFunctions NDemands
          MultiplyFunction Structural
            VariableReference MinNconc: VariableName=[Root].minimumNconc
            VariableReference PotentialDMAllocation: VariableName=[Root].potentialDMAllocation.Structural
          MultiplyFunction Metabolic
            SubtractFunction MetabolicNconc
              VariableReference CritNconc: VariableName=[Root].criticalNConc
              VariableReference MinNconc: VariableName=[Root].minimumNconc
            VariableReference PotentialDMAllocation: VariableName=[Root].potentialDMAllocation.Structural
          StorageNDemandFunction Storage
            VariableReference NitrogenDemandSwitch: VariableName=[Root].nitrogenDemandSwitch
            VariableReference MaxNconc: VariableName=[Root].maximumNconc
          Constant QStructuralPriority: FixedValue=1
          Constant QMetabolicPriority: FixedValue=1
          Constant QStoragePriority: FixedValue=1
        LinearInterpolationFunction NUptakeSWFactor
          XYPairs: X=[0, 1]; Y=[0, 1]
          VariableReference XValue: VariableName=[Root].RWC
        Constant RemobilisationCost: FixedValue=0
        PhaseLookup RootFrontVelocity
          Memo
            This approach is based upon that used in [robertson_simulation_2002].
          PhaseLookupValue PreEmergence: Start=Germination; End=Emergence
            Constant Function: FixedValue=15
          PhaseLookupValue early: Start=Emergence; End=StartGrainFilling
            Constant Function: FixedValue=35
          PhaseLookupValue late: Start=StartGrainFilling; End=Maturity
            Constant Function: FixedValue=0
        RootShapeCylinder RootShape
        Constant SenescenceRate: FixedValue=0.005
        Constant SpecificRootLength: FixedValue=60; Units=m/g
          Memo
            This approach is based upon that used in [robertson_simulation_2002].
        SubDailyInterpolation TemperatureEffect: agregationMethod=0
          XYPairs Response: X=[0, 26, 35]; Y=[1, 1, 1]
          ThreeHourAirTemperature InterpolationMethod
      Nodule
        BiomassRemoval BiomassRemovalDefaults: HarvestFractionLiveToRemove=0; HarvestFractionDeadToRemove=0; HarvestFractionLiveToResidue=0.2; HarvestFractionDeadToResidue=0
        Constant CarbonConcentration: FixedValue=0.4
        VariableReference CriticalNConc: VariableName=[Nodule].MinimumNConc
        Constant DetachmentRateFunction: FixedValue=0; Units=/d
        Constant DMConversionEfficiency: FixedValue=1; Units=0-1
        NutrientPoolFunctions DMDemands
          MultiplyFunction Structural
            PartitionFractionDemandFunction DMDemandFunction
              PhaseLookup PartitionFraction
                PhaseLookupValue Early: Start=Emergence; End=StartFlowering
                  Constant Function: FixedValue=0.03
                PhaseLookupValue Middle: Start=StartFlowering; End=StartGrainFilling
                  Constant Function: FixedValue=0.02
                PhaseLookupValue Late: Start=StartGrainFilling; End=Maturity
                  Constant Function: FixedValue=0
            Constant StructuralFraction: FixedValue=1; Units=g/g
          Constant Metabolic: FixedValue=0
          StorageDMDemandFunction Storage
            SubtractFunction StorageFraction
              Constant One: FixedValue=1
              VariableReference StructuralFraction: VariableName=[Nodule].DMDemands.Structural.StructuralFraction
        Constant DMReallocationFactor: FixedValue=0
        Constant DMRetranslocationFactor: FixedValue=0
        Constant FixationMetabolicCost: FixedValue=0
        HoldFunction FixationRate: WhenToHold=StartGrainFilling
          MinimumFunction DailyPotentialFixationRate
            MultiplyFunction PotentialFixationRate
              VariableReference LiveBiomass: VariableName=[AboveGroundLive].Wt
              PhaseLookup SpecificFixationRate
                PhaseLookupValue VegetativeGrowth: Start=Emergence; End=StartFlowering
                  Constant Rate: FixedValue=0.006
                PhaseLookupValue ReproductiveGrowth: Start=StartFlowering; End=EndGrainFill
                  Constant Rate: FixedValue=0.002
            Constant MaximumFixationRate: FixedValue=0.6
        Constant InitialWtFunction: FixedValue=0; Units=g/m^2
        Constant MaintenanceRespirationFunction: FixedValue=0; Units=0-1
        Constant MaximumNConc: FixedValue=0.02
        Constant MinimumNConc: FixedValue=0.01
        NutrientPoolFunctions NDemands
          MultiplyFunction Structural
            VariableReference MinNconc: VariableName=[Nodule].minimumNconc
            VariableReference PotentialDMAllocation: VariableName=[Nodule].potentialDMAllocation.Structural
          MultiplyFunction Metabolic
            SubtractFunction MetabolicNconc
              VariableReference CritNconc: VariableName=[Nodule].criticalNConc
              VariableReference MinNconc: VariableName=[Nodule].minimumNconc
            VariableReference PotentialDMAllocation: VariableName=[Nodule].potentialDMAllocation.Structural
          StorageNDemandFunction Storage
            VariableReference NitrogenDemandSwitch: VariableName=[Nodule].nitrogenDemandSwitch
            VariableReference MaxNconc: VariableName=[Nodule].maximumNconc
        PhaseLookupValue NitrogenDemandSwitch: Start=Emergence; End=EndGrainFill
          Constant: FixedValue=1
        Constant NReallocationFactor: FixedValue=0
        Constant NRetranslocationFactor: FixedValue=0
        Constant SenescenceRate: FixedValue=0
        Constant RemobilisationCost: FixedValue=0
      GenericOrgan Shell: IsAboveGround=true
        BiomassRemoval BiomassRemovalDefaults: HarvestFractionLiveToRemove=0; HarvestFractionDeadToRemove=0; HarvestFractionLiveToResidue=1; HarvestFractionDeadToResidue=1
        Constant CarbonConcentration: FixedValue=0.4
        VariableReference CriticalNConc: VariableName=[Shell].MinimumNConc
        Constant DetachmentRateFunction: FixedValue=0; Units=/d
        Constant DMConversionEfficiency: FixedValue=1; Units=0-1
        NutrientDemandFunctions DMDemands
          MultiplyFunction Structural
            PhaseLookup DMDemandFunction
              PhaseLookupValue PodDevelopment: Start=StartPodDevelopment; End=EndPodDevelopment
                MultiplyFunction HIPodDemand
                  VariableReference AboveGroundWt: VariableName=[AboveGround].Wt
                  DivideFunction HarvestIndexIncrease
                    MaximumFunction OutstandingHarvestIndexIncrease
                      ExpressionFunction Increase: Expression=[Shell].PotentialHarvestIndex - [Shell].HarvestIndex
                      Constant Zero: FixedValue=0
                    SubtractFunction TTRemaining
                      ExpressionFunction ShellGrowthTT
                        Expression=[Phenology].EarlyPodDevelopment.Target+[Phenology].EarlyGrainFilling.Target+[Phenology].MidGrainFilling.Target
                      ExpressionFunction ShellGrowthTTComplete
                        Expression=[Phenology].EarlyPodDevelopment.ProgressThroughPhase+[Phenology].EarlyGrainFilling.ProgressThroughPhase+[Phenology].MidGrainFilling.ProgressThroughPhase
                  VariableReference ThermalTime: VariableName=[Phenology].ThermalTime
            Constant StructuralFraction: FixedValue=1
          Constant Metabolic: FixedValue=0
          StorageDMDemandFunction Storage
            SubtractFunction StorageFraction
              Constant One: FixedValue=1
              VariableReference StructuralFraction: VariableName=[Shell].DMDemands.Structural.StructuralFraction
          Constant QStructuralPriority: FixedValue=1
          Constant QMetabolicPriority: FixedValue=1
          Constant QStoragePriority: FixedValue=1
        Constant DMReallocationFactor: FixedValue=0
        Constant DMRetranslocationFactor: FixedValue=0.1
        AddFunction FillingDuration
          VariableReference EarlyPodDevelopmentDuration: VariableName=[Phenology].EarlyPodDevelopment.Target
          VariableReference EarlyGrainFillingDuration: VariableName=[Phenology].EarlyGrainFilling.Target
          VariableReference MidGrainFillingDuration: VariableName=[Phenology].MidGrainFilling.Target
        DivideFunction HarvestIndex
          VariableReference ShellWt: VariableName=[Shell].Wt
          VariableReference AboveGroundWt: VariableName=[AboveGround].Wt
        VariableReference initialNConcFunction: VariableName=[Shell].MinimumNConc
        NutrientPoolFunctions InitialWt
          Constant Structural: FixedValue=0; Units=g/m^2
          Constant Metabolic: FixedValue=0
          Constant Storage: FixedValue=0
        Constant MaintenanceRespirationFunction: FixedValue=0; Units=0-1
        Constant MaximumNConc: FixedValue=0.045
        Constant MinimumNConc: FixedValue=0.01
        NutrientDemandFunctions NDemands
          MultiplyFunction Structural
            VariableReference MinNconc: VariableName=[Shell].minimumNconc
            VariableReference PotentialDMAllocation: VariableName=[Shell].potentialDMAllocation.Structural
          StorageNDemandFunction Storage
            VariableReference NitrogenDemandSwitch: VariableName=[Shell].nitrogenDemandSwitch
            VariableReference MaxNconc: VariableName=[Shell].maximumNconc
          Constant Metabolic: FixedValue=0
          Constant QStructuralPriority: FixedValue=1
          Constant QMetabolicPriority: FixedValue=1
          Constant QStoragePriority: FixedValue=1
        PhaseLookupValue NitrogenDemandSwitch: Start=StartPodDevelopment; End=EndPodDevelopment
          Constant: FixedValue=1
        Constant NReallocationFactor: FixedValue=1
        Constant NRetranslocationFactor: FixedValue=0.5
        Constant Photosynthesis: FixedValue=0
        MultiplyFunction PotentialHarvestIndex
          VariableReference PodHarvestIndex: VariableName=[Pod].PotentialHarvestIndex
          Constant ShellFraction: FixedValue=0.28; Units=0-1
        Constant RemobilisationCost: FixedValue=0
        RetranslocateNonStructural RetranslocateNitrogen
        PhaseLookup SenescenceRate
          PhaseLookupValue ReproductivePhase: Start=StartPodDevelopment; End=Maturity
            MinimumFunction Rate
              DivideFunction Fraction
                VariableReference TT: VariableName=[Phenology].ThermalTime
                SubtractFunction TTRemaining
                  ExpressionFunction ReproductiveTT
                    Expression=[Phenology].EarlyPodDevelopment.Target+[Phenology].EarlyGrainFilling.Target+[Phenology].MidGrainFilling.Target+[Phenology].LateGrainFilling.Target
                  ExpressionFunction ReproductiveTT1Complete
                    Expression=[Phenology].EarlyPodDevelopment.ProgressThroughPhase+[Phenology].EarlyGrainFilling.ProgressThroughPhase+[Phenology].MidGrainFilling.ProgressThroughPhase+[Phenology].LateGrainFilling.ProgressThroughPhase
              Constant One: FixedValue=1
      GenericOrgan Stem: IsAboveGround=true
        BiomassRemoval BiomassRemovalDefaults: HarvestFractionLiveToRemove=0; HarvestFractionDeadToRemove=0; HarvestFractionLiveToResidue=1; HarvestFractionDeadToResidue=1
        Constant CarbonConcentration: FixedValue=0.4
        VariableReference CriticalNConc: VariableName=[Stem].MinimumNConc
        NutrientDemandFunctions DMDemands
          MultiplyFunction Structural
            PhaseLookup Fraction
              PhaseLookupValue StemGrowthPhase: Start=Emergence; End=EndCanopyDevelopment
                Memo
                  This approach is based upon that used in [robertson_simulation_2002].
                Constant Fraction: FixedValue=0.9
              PhaseLookupValue PodAndGrainGrowth: Start=EndCanopyDevelopment; End=EndGrainFill
                Constant Fraction: FixedValue=0
            VariableReference DMDemand: VariableName=[Stem].PotentialGrowth
          Constant Metabolic: FixedValue=0
          MultiplyFunction Storage
            VariableReference DMDemand: VariableName=[Stem].PotentialGrowth
            SubtractFunction StorageFraction
              Constant One: FixedValue=1
              VariableReference StructuralFraction: VariableName=[Stem].DMDemands.Structural.Fraction
          Constant QStructuralPriority: FixedValue=1
          Constant QMetabolicPriority: FixedValue=1
          Constant QStoragePriority: FixedValue=1
        Constant DetachmentRateFunction: FixedValue=0; Units=/d
        Constant DMConversionEfficiency: FixedValue=1; Units=0-1
        Constant DMReallocationFactor: FixedValue=0
        PhaseLookup DMRetranslocationFactor
          PhaseLookupValue Vegetative: Start=Emergence; End=EndCanopyDevelopment
            Constant RetranslocationFactor: FixedValue=0
          PhaseLookupValue GrainFilling: Start=EndCanopyDevelopment; End=EndGrainFill
            Constant RetranslocationFactor: FixedValue=0.2
        NutrientPoolFunctions InitialWt: same as Replacements.Lentil.Shell.InitialWt
        VariableReference initialNConcFunction: VariableName=[Stem].MinimumNConc
        Constant MaintenanceRespirationFunction: FixedValue=0; Units=0-1
        LinearInterpolationFunction MaximumNConc
          XYPairs: X=[3, 4, 5]; Y=[0.025, 0.02, 0.015]
          VariableReference XValue: VariableName=[Phenology].Stage
        Constant MinimumNConc: FixedValue=0.006
        NutrientDemandFunctions NDemands
          MultiplyFunction Structural
            VariableReference MinNconc: VariableName=[Stem].minimumNconc
            VariableReference PotentialDMAllocation: VariableName=[Stem].potentialDMAllocation.Structural
          MultiplyFunction Metabolic
            SubtractFunction MetabolicNconc
              VariableReference CritNconc: VariableName=[Stem].criticalNConc
              VariableReference MinNconc: VariableName=[Stem].minimumNconc
            VariableReference PotentialDMAllocation: VariableName=[Stem].potentialDMAllocation.Structural
          StorageNDemandFunction Storage
            VariableReference NitrogenDemandSwitch: VariableName=[Stem].nitrogenDemandSwitch
            VariableReference MaxNconc: VariableName=[Stem].maximumNconc
          Constant QStructuralPriority: FixedValue=1
          Constant QMetabolicPriority: FixedValue=1
          Constant QStoragePriority: FixedValue=1
        PhaseLookupValue NitrogenDemandSwitch: Start=Emergence; End=StartGrainFilling
          Constant: FixedValue=1
        Constant NReallocationFactor: FixedValue=1
        Constant NRetranslocationFactor: FixedValue=0.5
        Constant Photosynthesis: FixedValue=0
        PartitionFractionDemandFunction PotentialGrowth
          PhaseLookup PartitionFraction
            PhaseLookupValue StemGrowthPhase: Start=Emergence; End=EndPodDevelopment
              Constant StemFraction: FixedValue=0.4
            PhaseLookupValue GrainFilling: Start=EndPodDevelopment; End=EndGrainFill
              Constant StemFraction: FixedValue=0
        Constant RemobilisationCost: FixedValue=0
        RetranslocateNonStructural RetranslocateNitrogen
        PhaseLookup SenescenceRate
          PhaseLookupValue PostCanopyPhase: Start=EndCanopyDevelopment; End=Maturity
            MinimumFunction Rate
              DivideFunction Fraction
                VariableReference TT: VariableName=[Phenology].ThermalTime
                SubtractFunction TTRemaining
                  ExpressionFunction PostCanopyTT
                    Expression=[Phenology].EarlyPodDevelopment.Target+[Phenology].EarlyGrainFilling.Target+[Phenology].MidGrainFilling.Target+[Phenology].LateGrainFilling.Target
                  ExpressionFunction PostCanopyTTComplete
                    Expression=[Phenology].MidGrainFilling.ProgressThroughPhase+[Phenology].LateGrainFilling.ProgressThroughPhase
              Constant One: FixedValue=1
      CompositeBiomass AboveGround: OrganNames=[Leaf, Stem, Grain, Shell]; IncludeLive=true; IncludeDead=true
      CompositeBiomass BelowGround: OrganNames=[Root, Nodule]; IncludeLive=true; IncludeDead=true
      CompositeBiomass AboveGroundLive: OrganNames=[Leaf, Stem, Grain, Shell]; IncludeLive=true; IncludeDead=false
      CompositeBiomass Total: OrganNames=[Leaf, Stem, Grain, Shell, Root, Nodule]; IncludeLive=true; IncludeDead=true
      CompositeBiomass TotalLive: OrganNames=[Leaf, Stem, Grain, Shell, Root, Nodule]; IncludeLive=true; IncludeDead=false
      CompositeBiomass TotalDead: OrganNames=[Leaf, Stem, Grain, Shell, Root, Nodule]; IncludeLive=false; IncludeDead=true
      CompositeBiomass Pod: OrganNames=[Shell, Grain]; IncludeLive=true; IncludeDead=true
        DivideFunction HarvestIndex
          VariableReference PodWt: VariableName=[Pod].Wt
          VariableReference AboveGroundWt: VariableName=[AboveGround].Wt
        Constant PotentialHarvestIndex: FixedValue=0.5
          Memo
            This approach is based upon that used in [robertson_simulation_2002].
      Folder Cultivars
        Cultivar Ace
          Command:
            [Phenology].JuvenileBase.FixedValue = 91
            [Phenology].VernSensitivity.FixedValue = 0.85
            [Phenology].InductivePpSensitivity.FixedValue = 0.37
            [Phenology].EarlyReproductivePpSensitivity.FixedValue = 0
        Cultivar Aldinga
        Cultivar Blitz
          Command:
            [Phenology].JuvenileBase.FixedValue = 70
            [Phenology].VernSensitivity.FixedValue = 0.35
            [Phenology].InductivePpSensitivity.FixedValue = 0.56
            [Phenology].EarlyReproductivePpSensitivity.FixedValue = 0
        Cultivar Bolt
          Command:
            [Phenology].JuvenileBase.FixedValue = 30
            [Phenology].VernSensitivity.FixedValue = 0.22
            [Phenology].InductivePpSensitivity.FixedValue = 0.62
            [Phenology].EarlyReproductivePpSensitivity.FixedValue = 0.02
        Cultivar Boomer
        Cultivar CIPAL0901
        Cultivar CIPAL1504
        Cultivar CIPAL1701
        Cultivar Commando
        Cultivar Digger
        Cultivar Flash
        Cultivar Greenfield
          Command:
            [Phenology].JuvenileBase.FixedValue = 305
            [Phenology].VernSensitivity.FixedValue = 0
            [Phenology].InductivePpSensitivity.FixedValue = 0.67
            [Phenology].EarlyReproductivePpSensitivity.FixedValue = 0
        Cultivar Giant
        Cultivar HallmarkXT
          Command:
            [Phenology].JuvenileBase.FixedValue = 200
            [Phenology].VernSensitivity.FixedValue = 0.0
            [Phenology].InductivePpSensitivity.FixedValue = 0.93
            [Phenology].EarlyReproductivePpSensitivity.FixedValue = 0
        Cultivar Hurricane
        Cultivar Indianhead
        Cultivar Jumbo
        Cultivar Jumbo2
          Command:
            [Phenology].JuvenileBase.FixedValue = 75
            [Phenology].VernSensitivity.FixedValue = 0.89
            [Phenology].InductivePpSensitivity.FixedValue = 0.36
            [Phenology].EarlyReproductivePpSensitivity.FixedValue = 0
        Cultivar Matilda
        Cultivar Nipper
        Cultivar Northfield
        Cultivar Nugget
          Command:
            [Phenology].JuvenileBase.FixedValue = 207
            [Phenology].VernSensitivity.FixedValue = 0.74
            [Phenology].InductivePpSensitivity.FixedValue = 0.21
            [Phenology].EarlyReproductivePpSensitivity.FixedValue = 0.09
        Cultivar Precoz
          Command:
            [Phenology].JuvenileBase.FixedValue = 67
            [Phenology].VernSensitivity.FixedValue = 0.5
            [Phenology].InductivePpSensitivity.FixedValue = 0.25
            [Phenology].EarlyReproductivePpSensitivity.FixedValue = 0
        Cultivar Laird
          Command:
            [Phenology].JuvenileBase.FixedValue = 360
            [Phenology].VernSensitivity.FixedValue = 0.44
            [Phenology].InductivePpSensitivity.FixedValue = 0.22
            [Phenology].EarlyReproductivePpSensitivity.FixedValue = 0.44
        Cultivar Syrian
          Command:
            [Phenology].JuvenileBase.FixedValue = 0
            [Phenology].VernSensitivity.FixedValue = .37
            [Phenology].InductivePpSensitivity.FixedValue = 1.45
            [Phenology].EarlyReproductivePpSensitivity.FixedValue = .56
        Cultivar Ethiopian
          Command:
            [Phenology].JuvenileBase.FixedValue = 240
            [Phenology].VernSensitivity.FixedValue = 0.65
            [Phenology].InductivePpSensitivity.FixedValue = 0
            [Phenology].EarlyReproductivePpSensitivity.FixedValue = 0.33
      Constant MortalityRate: FixedValue=0
      Constant SeedMortalityRate: FixedValue=0
    Report DailyReport
      VariableNames:
        [Clock].Today
        [Simulation].Name
        [IWeather].MeanT
        [Lentil].AboveGround.Wt
        [Lentil].Leaf.CoverGreen
        [Lentil].Leaf.LAI
        [Lentil].Leaf.Live.Wt
        [Lentil].Leaf.NodeNumber
        [Lentil].Phenology.PreEmergenceTt
        [Lentil].Phenology.AccumulatedTT
        [Lentil].Phenology.ThermalTime
        [Lentil].Phenology.Stage
        [Lentil].Phenology.Photoperiod
        [Lentil].Phenology.AccumulatedVernalisation
        [Lentil].Phenology.VernalisationSaturation
        [Lentil].Stem.Wt
        [Lentil].Grain.Wt
        [Lentil].Shell.Wt
        [Soil].Water.Volumetric
        sum([Soil].Water.MM)
    Report HarvestReport: EventNames=[Lentil].Harvesting
      VariableNames:
        [Clock].Today as Date
        [Simulation].Name
        [Lentil].SowingData.Cultivar
        [Lentil].SowingDate
        [Lentil].Phenology.EmergenceDAS
        [Lentil].Phenology.StartBuddingDAS
        [Lentil].Phenology.StartFloweringDAS
        [Lentil].Phenology.PodEmergenceDAS
        [Lentil].Phenology.MaturityDAS
        [Lentil].Grain.Wt
        [Lentil].Grain.Size
        [Lentil].AboveGround.Wt
        [Lentil].Grain.HarvestIndex
        [Lentil].Phenology.CurrentStageName
        [Lentil].Phenology.EmergenceTt
        [Lentil].Phenology.StartBuddingTt
        [Lentil].Phenology.StartFloweringTt
        [Lentil].Phenology.PodEmergenceTt
        [Lentil].Phenology.MaturityTt
    Report SowingReport: EventNames=[Lentil].PlantSowing
      VariableNames:
        [Simulation].Name
        [Clock].Today
        [Lentil].SowingData.Cultivar
        [IWeather].Latitude
        [IWeather].Longitude
        [Soil].Physical.Thickness
    Manager Harvesting
```csharp
using Models.PMF.Phen;
using System;
using Models.Core;
using System.Collections.Generic;
using System.Text;
using Models.Soils;
using Models.PMF;
using Models;
using System.Xml.Serialization;
using APSIM.Shared.Utilities;

namespace Models
{
    [Serializable] 
    public class Script : Model
    {      
        [Link] private Plant Chickpea;
        [Link] private Zone zone;
        [Link] private Clock clock;
        [Link]
        private Phenology phenology;
                    
        
        [EventSubscribe("StartOfSimulation")]
        private void OnSimulationCommencing(object sender, EventArgs e)
        {
        }       
        
        [EventSubscribe("DoManagement")]
        private void OnDoManagement(object sender, EventArgs e)
        {
        //if (phenology.CurrentPhase.Name=="ReadyForHarvesting")
        if (clock.Today == clock.EndDate)
           {
           Chickpea.Harvest();
           //Chickpea.EndCrop();
           }
        }
        
        [EventSubscribe("DoManagementCalculations")]
        private void OnDoManagementCalculations(object sender, EventArgs e)
        {
            
        }
    }
}
```
    Manager SetCropParameters
```csharp
using Models.Core;
using System;
namespace Models
{
   [Serializable]
   public class Script : Model
   {
      [Link] Zone zone;
      [EventSubscribe("Sowing")]
      private void OnSowing(object sender, EventArgs e)
      {
         object Pval = 0;
         Pval = 123.1306896609742;
         zone.Set("[Phenology].JuvenileBase.FixedValue", Pval);
         Pval = 1.10814564931727;
         zone.Set("[Phenology].VernSensitivity.FixedValue", Pval);
         Pval = 0.1435222068323385;
         zone.Set("[Phenology].InductivePpSensitivity.FixedValue", Pval);
      }
   }
}
```
  Folder ControlledEnvironment
    Experiment Roberts1988
      Factors
        Permutation
          Factor InitT
            CompositeFactor 1oC
              Specifications:
                [Experiment].Script.InitTempMax = 1.3
                [Experiment].Script.InitTempMin = 1.3
                [Experiment].Script.FinalTempLag = 0
            CompositeFactor 5oC
              Specifications:
                [Experiment].Script.InitTempMax = 5.0
                [Experiment].Script.InitTempMin = 5.0
                [Experiment].Script.FinalTempLag = 0
            CompositeFactor 9oC
              Specifications:
                [Experiment].Script.InitTempMax = 9.0
                [Experiment].Script.InitTempMin = 9.0
                [Experiment].Script.FinalTempLag = 0
          Factor InitPp
            CompositeFactor 16h
              Specifications:
                [Experiment].Script.InitPp = 16.0
            CompositeFactor 8h
              Specifications:
                [Experiment].Script.InitPp = 8.0
          Factor Durat: Specification=[Experiment].Script.TransitionDay = 0,10,30,60
          Factor FinalT
            CompositeFactor 12oC
              Specifications:
                [Experiment].Script.FinalTempMax = 18.0
                [Experiment].Script.FinalTempMin = 5.0
            CompositeFactor 19oC
              Specifications:
                [Experiment].Script.FinalTempMax = 24.0
                [Experiment].Script.FinalTempMin = 13.0
          Factor FinalPp
            CompositeFactor 16h
              Specifications:
                [Experiment].Script.FinalPp = 16.0
                [Experiment].Script.FinalTempLag = 3
            CompositeFactor 11h
              Specifications:
                [Experiment].Script.FinalPp = 11.0
                [Experiment].Script.FinalTempLag = -2
          Factor Cv
            CompositeFactor Precoz: Specifications=[Experiment].Script.CultivarName=Precoz
            CompositeFactor Laird: Specifications=[Experiment].Script.CultivarName=Laird
      Simulation ReadingCE
        Clock: Start=1988-05-01; End=1988-12-31
        Summary SummaryFile
        SoilArbitrator
        ControlledEnvironment: MaxT=23.6; MinT=23.6; Rain=0; Radn=17.64; PanEvap=5; VP=2; Wind=3; CO2=340; AirPressure=1010; DiffuseFraction=0; Latitude=-27; Longitude=0; DayLength=16; SunRise=0; TempLag=0
        Zone Field: Area=1; Slope=0; AspectAngle=0; Altitude=50
          Fertiliser
          Soil: ASCOrder=Vertosol; ASCSubOrder=Black; SoilType=Clay; Site=Norwin; NearestTown=Norwin; Region=Darling Downs and Granite Belt; State=Queensland; Country=Australia; NaturalVegetation=Qld. Bluegrass, possible Qld. Blue gum; ApsoilNumber=900; Latitude=-27.5818; Longitude=151.3202; LocationAccuracy=+/- 20m
            DataSource=CSIRO Sustainable Ecosystems, Toowoomba; Characteriesd as part of the GRDC funded project"Doing it better, doing it smarter, managing soil water in Australian agriculture' 2011
            Comments=OC, CLL for all crops estimated-based on Bongeen Mywybilla Soil No1
            Physical
              Thickness  ParticleSizeSand  ParticleSizeSilt  ParticleSizeClay  Rocks  BD      AirDry  LL15    DUL     SAT     KS
              150        5                 65                30                0      1.0106  0.1303  0.2605  0.521   0.5887  20
              150        5                 65                30                0      1.0715  0.1987  0.2484  0.4967  0.5657  20
              300        5                 65                30                0      1.0939  0.28    0.28    0.4884  0.5572  20
              300        5                 65                30                0      1.1586  0.28    0.28    0.4803  0.5328  20
              300        5                 65                30                0      1.173   0.28    0.28    0.4716  0.5274  20
              300        5                 65                30                0      1.1629  0.28    0.28    0.4571  0.5312  20
              300        5                 65                30                0      1.1875  0.28    0.28    0.4523  0.5219  20
              Rocks, ParticleSizeSand, ParticleSizeSilt, ParticleSizeClay source: Calculated
              SoilCrop LentilSoil: LL=[0.261, 0.248, 0.28, 0.306, 0.36, 0.392, 0.446]; KL=[0.06, 0.06, 0.06, 0.04, 0.04, 0.02, 0.01]; XF=[1, 1, 1, 1, 1, 1, 1]
            WaterBalance SoilWater: SummerDate=1-Nov; SummerU=5; SummerCona=5; WinterDate=1-Apr; WinterU=5; WinterCona=5; DiffusConst=40; DiffusSlope=16; Salb=0.12; CN2Bare=73; CNRed=20; CNCov=0.8; PSIDul=-100; Thickness=[150, 150, 300, 300, 300, 300, 300]; SWCON=[0.3, 0.3, 0.3, 0.3, 0.3, 0.3, 0.3]
            Organic: FOMCNRatio=40; CarbonUnits=Total
              Thickness  Carbon  SoilCNRatio  FBiom  FInert  FOM
              150        1.2     12           0.04   0.4     347.129
              150        0.96    12           0.02   0.6     270.344
              300        0.6     12           0.02   0.8     163.972
              300        0.3     12           0.02   1       99.4541
              300        0.18    12           0.01   1       60.322
              300        0.12    12           0.01   1       36.5871
              300        0.12    12           0.01   1       22.1912
            Chemical: Thickness=[150, 150, 300, 300, 300, 300, 300]; PH=[8, 8, 8, 8, 8, 8, 8]; PHUnits=Water
            Water: Thickness=[150, 150, 300, 300, 300, 300, 300]; InitialValues=[0.521, 0.4967, 0.4884, 0.4803, 0.4716, 0.4571, 0.4523]; InitialPAWmm=361.23; RelativeTo=LL15; FilledFromTop=false
            CERESSoilTemperature Temperature
            Nutrient
            Solute NO3: Thickness=[150, 150, 300, 300, 300, 300, 300]; InitialValues=[1, 1, 1, 1, 1, 1, 1]; InitialValuesUnits=ppm; WaterTableConcentration=0; D0=0; DepthConstant=0; MaxDepthSoluteAccessible=0; RunoffEffectivenessAtMovingSolute=0; MaxEffectiveRunoff=0
            Solute NH4: Thickness=[150, 150, 300, 300, 300, 300, 300]; InitialValues=[0.1, 0.1, 0.1, 0.1, 0.1, 0.1, 0.1]; InitialValuesUnits=ppm; WaterTableConcentration=0; D0=0; DepthConstant=0; MaxDepthSoluteAccessible=0; RunoffEffectivenessAtMovingSolute=0; MaxEffectiveRunoff=0
            Solute Urea: Thickness=[150, 150, 300, 300, 300, 300, 300]; InitialValues=[0, 0, 0, 0, 0, 0, 0]; InitialValuesUnits=kg/ha; WaterTableConcentration=0; D0=0; DepthConstant=0; MaxDepthSoluteAccessible=0; RunoffEffectivenessAtMovingSolute=0; MaxEffectiveRunoff=0
          SurfaceOrganicMatter: InitialResidueName=wheat_stubble; InitialResidueType=wheat; InitialResidueMass=500; InitialStandingFraction=0; InitialCPR=0; InitialCNR=100
          MicroClimate: a_interception=0; b_interception=1; c_interception=0; d_interception=0; SoilHeatFluxFraction=0.4; MinimumHeightDiffForNewLayer=0; NightInterceptionFraction=0.5; ReferenceHeight=2
          Manager Experiment
            InitTempMax = 0
            CultivarName = Ace
            SowingDepth = 20
            TransitionDay = 0
            InitTempMin = 0
            InitPp = 0
            FinalTempMax = 0
            FinalTempMin = 0
            FinalPp = 0
            InitTempLag = 0
            FinalTempLag = 0
            SunUp = 4
```csharp
using Models.PMF.Phen;
using APSIM.Shared.Utilities;
using Models.Utilities;
using Models.Soils;
using Models.PMF;
using Models.Core;
using System;
using Models.Climate;
using System.Globalization;

namespace Models
{
    [Serializable]
    public class Script : Model
    {
        [Link] private Clock clock;
        [Link] private Summary summary;
        [Link] private Plant lentil;
        [Link] private ControlledEnvironment ci;
        [Link]
        private Phenology phenology;

        [Display(Type = DisplayType.CultivarName)]
        [Description("Cultivar to be sown")]
        public string CultivarName { get; set; }
        [Description("Sowing depth (mm)")]
        public double SowingDepth { get; set; }
        [Description("Treatment duration (Days)")]
        public double TransitionDay { get; set; }
        [Description("Max Initial temperature (oC)")]
        public double InitTempMax { get; set; }
        [Description("Min Initial temperature (oC)")]
        public double InitTempMin { get; set; }
        [Description("Init photoperiod (h)")]
        public double InitPp { get; set; }
        [Description("Init temp change lag (h)")]
        public double InitTempLag { get; set; }
        [Description("Max Final temperature (oC)")]
        public double FinalTempMax { get; set; }
        [Description("Min Final temperature (oC)")]
        public double FinalTempMin { get; set; }
        [Description("Final photoperiod (h)")]
        public double FinalPp { get; set; }
        [Description("Final temp change lag (h)")]
        public double FinalTempLag { get; set; }
        [Description("Sun rise (h)")]
        public double SunUp { get; set; }
        
        private double DAS {get; set;}
        private bool FirstDay = true;
        private double Weeks {get; set;}
        private bool Transitioned = false;
        private bool Emerged = false;

        [EventSubscribe("DoCatchYesterday")]
        private void DoCatchYesterday(object sender, EventArgs e)
        {
            if (FirstDay)
            {
                ci.MaxT = InitTempMax;
                ci.MinT = InitTempMin;
                ci.DayLength = InitPp;
                ci.Radn = InitPp * 3600 * 0.000170 * 2; //Hours * s/h * MJ/m2/s * Coeff_PAR->Total
                ci.TempLag = InitTempLag;
                ci.SunRise = SunUp;
                lentil.Sow(population: 100, cultivar: CultivarName, depth: SowingDepth, rowSpacing: 150);    
                FirstDay = false;
                summary.WriteMessage(this,"Wheat crop sown", MessageType.Diagnostic);
            }

            DAS += 1;
            if (DAS <= TransitionDay)
            {
                ci.MaxT = InitTempMax;
                ci.MinT = InitTempMin;
                ci.DayLength = InitPp;
                ci.Radn = InitPp * 3600 * 0.000170 * 2; //Hours * s/h * MJ/m2/s * Coeff_PAR->Total 
                ci.TempLag = InitTempLag;
                ci.SunRise = SunUp;
            }
            else
            {
                if ((DAS >= TransitionDay)&&(Transitioned = false))
                {
                    Transitioned = true;
                    summary.WriteMessage(this,"Plants moved to post treatment chamber", MessageType.Diagnostic);
                }
                ci.MaxT=FinalTempMax;
                ci.MinT=FinalTempMin;
                ci.DayLength = FinalPp;
                ci.Radn = FinalPp * 3600 * 0.000170 * 2; //Hours * s/h * MJ/m2/s * Coeff_PAR->Total 
                ci.TempLag = FinalTempLag;
                ci.SunRise = SunUp;
            }
        }
    }
}
```
          Manager HarvestAtFlowering (disabled)
```csharp
using Models.PMF.Phen;
using APSIM.Shared.Utilities;
using Models.Utilities;
using Models.Soils;
using Models.PMF;
using Models.Core;
using System;
using Models.Soils.Nutrients;

namespace Models
{
    [Serializable]
    public class Script : Model
    {
        [Link] private Plant Lentil;
        [Link] private Clock clock;
        [Link(Type = LinkType.Path, Path = "[Lentil].Phenology")]
        private Phenology phenology;

        [EventSubscribe("DoManagement")]
        private void OnDoManagement(object sender, EventArgs e)
        {
            if (phenology.CurrentPhase.Name=="EarlyFlowering")
            {
               Lentil.Harvest();
               Lentil.EndCrop();    
               clock.EndDate = clock.Today.Date;
            }
        }
    }
}
```
          Report DailyReport
          Report HarvestReport
          Report SowingReport
          Plant Lentil
          Report spec
            VariableNames:
              [Experiment].Script.TransitionDay
              [Lentil].Phenology.StartFloweringDAS
              [Lentil].Phenology.EmergenceDAS
              [Lentil].Phenology.StartFloweringTt
            EventNames:
              [Lentil].Harvesting
          Manager Harvesting: same as Replacements.Harvesting
          Manager SetCropParameters
        Manager LocationInfo
          Country =
          State =
          Region =
```csharp
using Models.Soils;
using System;
using Models.Core;
using Models.PMF;
using APSIM.Shared.Utilities;

namespace Models
{
    [Serializable]
    public class Script : Model
    {
        [Link] Clock Clock;
        [Link] Fertiliser Fertiliser;
        [Link] Summary Summary;
        
        [Description("Country")]
        public string Country { get; set; }

        [Description("State")]
        public string State { get; set; }

        [Description("Region")]
        public string Region { get; set; }

    }
}
```
    Experiment Roberts1986
      Factors
        Permutation
          Factor Pp
            CompositeFactor 16to10h
              Specifications:
                [Experiment].Script.InitTempMax = 30
                [Experiment].Script.InitTempMin = 15
                [Experiment].Script.InitPp = 16.0
                [Experiment].Script.FinalTempMax = 30
                [Experiment].Script.FinalTempMin = 15
                [Experiment].Script.FinalPp = 10.0
            CompositeFactor 10to16h
              Specifications:
                [Experiment].Script.InitTempMax = 30
                [Experiment].Script.InitTempMin = 15
                [Experiment].Script.InitPp = 10.0
                [Experiment].Script.FinalTempMax = 30
                [Experiment].Script.FinalTempMin = 15
                [Experiment].Script.FinalPp = 16.0
            CompositeFactor 8to16h
              Specifications:
                [Experiment].Script.InitTempMax = 32
                [Experiment].Script.InitTempMin = 15
                [Experiment].Script.InitPp = 8.0
                [Experiment].Script.FinalTempMax = 32
                [Experiment].Script.FinalTempMin = 15
                [Experiment].Script.FinalPp = 16.0
            CompositeFactor 16to8h
              Specifications:
                [Experiment].Script.InitTempMax = 32
                [Experiment].Script.InitTempMin = 15
                [Experiment].Script.InitPp = 16.0
                [Experiment].Script.FinalTempMax = 32
                [Experiment].Script.FinalTempMin = 15
                [Experiment].Script.FinalPp = 8.0
            Memo Note
              The 8to16h and 16to8h treatments were part of a seperate experiment where day time temperature was not controlled well and exceeded the target temp of 30oC on may occasions.  The daily temperature data is not given so we have assumed a mean daily value of 32oC for these treatments
          Factor Durat
            Specification=[Experiment].Script.TransitionDay = 0,9,13,17,21,25,29,33,37,41,45
          Factor Cv
            CompositeFactor Precoz: Specifications=[Experiment].Script.CultivarName=Precoz
            CompositeFactor Laird: Specifications=[Experiment].Script.CultivarName=Laird
            CompositeFactor Syrian: Specifications=[Experiment].Script.CultivarName=Syrian
      Simulation ReadingCE2
        Clock: Start=1988-05-01; End=1988-12-31
        Summary SummaryFile
        SoilArbitrator
        ControlledEnvironment: MaxT=23.6; MinT=23.6; Rain=0; Radn=17.64; PanEvap=5; VP=2; Wind=3; CO2=340; AirPressure=1010; DiffuseFraction=0; Latitude=-27; Longitude=0; DayLength=16; SunRise=4; TempLag=0
        Zone Field: Area=1; Slope=0; AspectAngle=0; Altitude=50
          Fertiliser
          Soil: same as ControlledEnvironment.Roberts1988.ReadingCE.Field.Soil
          SurfaceOrganicMatter: InitialResidueName=wheat_stubble; InitialResidueType=wheat; InitialResidueMass=500; InitialStandingFraction=0; InitialCPR=0; InitialCNR=100
          MicroClimate: a_interception=0; b_interception=1; c_interception=0; d_interception=0; SoilHeatFluxFraction=0.4; MinimumHeightDiffForNewLayer=0; NightInterceptionFraction=0.5; ReferenceHeight=2
          Manager Experiment
            InitTempMax = 0
            CultivarName = Ace
            SowingDepth = 20
            TransitionDay = 0
            InitTempMin = 0
            InitPp = 0
            FinalTempMax = 0
            FinalTempMin = 0
            FinalPp = 0
```csharp
using Models.PMF.Phen;
using APSIM.Shared.Utilities;
using Models.Utilities;
using Models.Soils;
using Models.PMF;
using Models.Core;
using System;
using Models.Climate;
using System.Globalization;

namespace Models
{
    [Serializable]
    public class Script : Model
    {
        [Link] private Clock clock;
        [Link] private Summary summary;
        [Link] private Plant lentil;
        [Link] private ControlledEnvironment ci;
        [Link]
        private Phenology phenology;

        [Display(Type = DisplayType.CultivarName)]
        [Description("Cultivar to be sown")]
        public string CultivarName { get; set; }
        [Description("Sowing depth (mm)")]
        public double SowingDepth { get; set; }
        [Description("Treatment duration (Days)")]
        public double TransitionDay { get; set; }
        [Description("Max Initial temperature (oC)")]
        public double InitTempMax { get; set; }
        [Description("Min Initial temperature (oC)")]
        public double InitTempMin { get; set; }
        [Description("Init photoperiod (h)")]
        public double InitPp { get; set; }
        [Description("Max Final temperature (oC)")]
        public double FinalTempMax { get; set; }
        [Description("Min Final temperature (oC)")]
        public double FinalTempMin { get; set; }
        [Description("Final photoperiod (h)")]
        public double FinalPp { get; set; }
        private double DAS {get; set;}
        private bool FirstDay = true;
        private double Weeks {get; set;}
        private bool Transitioned = false;
        private bool Emerged = false;

        [EventSubscribe("DoCatchYesterday")]
        private void DoCatchYesterday(object sender, EventArgs e)
        {
            if (FirstDay)
            {
                ci.MaxT = InitTempMax;
                ci.MinT = InitTempMin;
                ci.DayLength = InitPp;
                ci.Radn = InitPp * 3600 * 0.000170 * 2; //Hours * s/h * MJ/m2/s * Coeff_PAR->Total 
                lentil.Sow(population: 100, cultivar: CultivarName, depth: SowingDepth, rowSpacing: 150);    
                FirstDay = false;
                summary.WriteMessage(this,"Wheat crop sown", MessageType.Diagnostic);
            }


            DAS += 1;
            if (DAS <= TransitionDay)
            {
                ci.MaxT = InitTempMax;
                ci.MinT = InitTempMin;
                ci.DayLength = InitPp;
                ci.Radn = InitPp * 3600 * 0.000170 * 2; //Hours * s/h * MJ/m2/s * Coeff_PAR->Total 
            }
            else
            {
                if ((DAS >= TransitionDay)&&(Transitioned = false))
                {
                    Transitioned = true;
                    summary.WriteMessage(this,"Plants moved to post treatment chamber", MessageType.Diagnostic);
                }
                ci.MaxT=FinalTempMax;
                ci.MinT=FinalTempMin;
                ci.DayLength = FinalPp;
                ci.Radn = FinalPp * 3600 * 0.000170 * 2; //Hours * s/h * MJ/m2/s * Coeff_PAR->Total 
            }
        }
    }
}
```
          Manager HarvestAtFlowering (disabled)
            script: same as in ControlledEnvironment.Roberts1988.ReadingCE.Field.HarvestAtFlowering
          Report DailyReport
          Report HarvestReport
          Report SowingReport
          Plant Lentil
          Report spec
            VariableNames:
              [Experiment].Script.TransitionDay
              [Lentil].Phenology.StartFloweringDAS
              [Lentil].Phenology.StartBuddingDAS
              [Lentil].Phenology.EmergenceDAS
            EventNames:
              [Lentil].Harvesting
          Report specdaily: EventNames=[Clock].EndOfDay
            VariableNames:
              [Clock].Today
              [Lentil].Phenology.ThermalTime
          Manager Harvesting: same as Replacements.Harvesting
          Manager SetCropParameters
        Manager LocationInfo: same as ControlledEnvironment.Roberts1988.ReadingCE.LocationInfo
    Experiment Summerfield1985
      Factors
        Permutation
          Factor InitT
            CompositeFactor 1oC
              Specifications:
                [Experiment].Script.InitTempMax = 1.5
                [Experiment].Script.InitTempMin = 1.5
                [Experiment].Script.InitPp = 0
          Factor Durat: Specification=[Experiment].Script.TransitionDay = 0,30
          Factor FinalTmax
            CompositeFactor 18oC: Specifications=[Experiment].Script.FinalTempMax = 18.0
            CompositeFactor 28oC: Specifications=[Experiment].Script.FinalTempMax = 28.0
          Factor FinalTmin
            CompositeFactor 5oC: Specifications=[Experiment].Script.FinalTempMin = 5.0
            CompositeFactor 13oC: Specifications=[Experiment].Script.FinalTempMin = 13.0
          Factor FinalPp
            CompositeFactor 16h: Specifications=[Experiment].Script.FinalPp = 16.0
            CompositeFactor 13h: Specifications=[Experiment].Script.FinalPp = 13.0
            CompositeFactor 10h: Specifications=[Experiment].Script.FinalPp = 10.0
          Factor Cv
            CompositeFactor Precoz: Specifications=[Experiment].Script.CultivarName=Precoz
            CompositeFactor Laird: Specifications=[Experiment].Script.CultivarName=Laird
            CompositeFactor Ethiopian: Specifications=[Experiment].Script.CultivarName=Ethiopian
      Simulation ReadingCE3
        Clock: Start=1988-05-01; End=1988-12-31
        Summary SummaryFile
        SoilArbitrator
        ControlledEnvironment: MaxT=23.6; MinT=23.6; Rain=0; Radn=17.64; PanEvap=5; VP=2; Wind=3; CO2=340; AirPressure=1010; DiffuseFraction=0; Latitude=-27; Longitude=0; DayLength=16; SunRise=4; TempLag=2
        Zone Field: Area=1; Slope=0; AspectAngle=0; Altitude=50
          Fertiliser
          Soil: same as ControlledEnvironment.Roberts1988.ReadingCE.Field.Soil
          SurfaceOrganicMatter: InitialResidueName=wheat_stubble; InitialResidueType=wheat; InitialResidueMass=500; InitialStandingFraction=0; InitialCPR=0; InitialCNR=100
          MicroClimate: a_interception=0; b_interception=1; c_interception=0; d_interception=0; SoilHeatFluxFraction=0.4; MinimumHeightDiffForNewLayer=0; NightInterceptionFraction=0.5; ReferenceHeight=2
          Manager Experiment
            InitTempMax = 0
            CultivarName = Ace
            SowingDepth = 20
            TransitionDay = 0
            InitTempMin = 0
            InitPp = 0
            FinalTempMax = 0
            FinalTempMin = 0
            FinalPp = 0
            script: same as in ControlledEnvironment.Roberts1986.ReadingCE2.Field.Experiment
          Manager HarvestAtFlowering (disabled): same as ControlledEnvironment.Roberts1986.ReadingCE2.Field.HarvestAtFlowering
          Report DailyReport
          Report HarvestReport
          Report SowingReport
          Plant Lentil
          Report spec
            VariableNames:
              [Experiment].Script.TransitionDay
              [Lentil].Phenology.StartFloweringDAS
              [IWeather].MeanT
            EventNames:
              [Lentil].Harvesting
          Report specdaily
            VariableNames:
              [Clock].Today
              [Lentil].Phenology.ThermalTime
            EventNames:
              [Lentil].Harvesting
          Manager Harvesting: same as Replacements.Harvesting
          Manager SetCropParameters
        Manager LocationInfo: same as ControlledEnvironment.Roberts1988.ReadingCE.LocationInfo
  Experiment Dooen2001
    Factors
      Memo
        **Factors at Emerald**

        ***Time of sowing***

        1. 1 May, 2019
        2. 18 May, 2019
        3. 7 June, 2019

        ***Cultivar***

        PBA Jumbo 2
        PBA Blitz
        PBA Ace
        PBA Hallmark XT
        PBA Greenfield
      Permutation
        Factor Irr
          CompositeFactor Wet: Specifications=[Irrigate on fixed dates]
            Manager Irrigate on fixed dates
              Amount = 45
              IrrigateDates = 10-aug, 22-sep
              Depth = 0
              Efficiency = 1
              WillRunoff = False
```csharp
using Models.Soils;
using System;
using Models.Core;
using Models.PMF;
using APSIM.Shared.Utilities;
namespace Models
{
    [Serializable]
    public class Script : Model
    {
        [Link] Clock Clock;
        [Link] Irrigation Irrigation;
        
        [Separator("A component to apply irrigation on one or more dates on every year of the simulation")]

        [Description("Enter the irrigation dates as dd-mmm with comma separation (any year information entered will be ignored)")] public string[] IrrigateDates { get; set; }
        
        [Description("Amount of irrigation to be applied (mm)")] public double Amount { get; set; }
        
        [Description("Depth in the soil to apply the  irrigation (mm)")] public double Depth { get; set; }
        
        [Description("Efficiency of irrigation (0-1)")] public double Efficiency { get; set; }
        
        [Description("Will the irrigation runoff?")] public bool WillRunoff { get; set; }
        
        [EventSubscribe("DoManagement")]
        private void OnDoManagement(object sender, EventArgs e)
        {
            foreach (string ddMMM in IrrigateDates)
            {
                if (DateUtilities.DatesEqual(ddMMM, Clock.Today))
                    Irrigation.Apply(amount: Amount, depth: Depth, efficiency: Efficiency, willRunoff: WillRunoff);
            }
        }
    }
}
```
          CompositeFactor Dry
    Simulation DR_2001DooenWet
      Memo
        Lentil experiment run in 2001 +/- irrigation at Dooen, by Daniel Rodriguez.
      Weather: FileName=ExNeil\LentilNextGen\beulah.met; Latitude=-35.9384; Tav=15.84; Amp=14.66
      Clock: Start=2001-06-27; End=2001-12-31
      Summary summaryfile
      SoilArbitrator Soil Arbitrator
      Zone Field: Area=1; Slope=0; AspectAngle=0; Altitude=50
        MicroClimate: a_interception=0; b_interception=1; c_interception=0; d_interception=0; SoilHeatFluxFraction=0.4; MinimumHeightDiffForNewLayer=0; NightInterceptionFraction=0.5; ReferenceHeight=1
        Irrigation
        Fertiliser
        SurfaceOrganicMatter: InitialResidueName=maize; InitialResidueType=maize; InitialResidueMass=500; InitialStandingFraction=0; InitialCPR=0; InitialCNR=65
        Report DailyReport: EventNames=[Clock].DoReport
          VariableNames:
            [Clock].Today
            [Soil].Water.Volumetric
            [Soil].SoilWater.Eo
            [Soil].SoilWater.Es
            [Soil].SoilWater.Drainage
            [Soil].SoilWater.Runoff
            [Soil].SoilWater.pond
            sum([Soil].Water.MM) as ProfileWater
            [Soil].NO3.kgha
            [MicroClimate].net_radn
            [MicroClimate].peta
            [MicroClimate].petr
            [Lentil].
        Report HarvestReport: EventNames=[Chickpea].Harvesting
          VariableNames:
            [Clock].Today
            [Lentil].Phenology.CurrentStageName as Stage
            [Lentil].Phenology.FloweringDAS as FloweringDAS
            [Lentil].Phenology.MaturityDAS as MaturityDAS
            [Lentil].Grain.Live.Wt as GrainWt
            [Lentil].AboveGround.Wt
        Manager Harvesting
```csharp
using Models.PMF.Phen;
using System;
using Models.Core;
using System.Collections.Generic;
using System.Text;
using Models.Soils;
using Models.PMF;
using Models;
using System.Xml.Serialization;
using APSIM.Shared.Utilities;

namespace Models
{
    [Serializable] 
    public class Script : Model
    {      
        [Link] private Plant Chickpea;
        [Link] private Zone zone;
        [Link]
        private Phenology phenology;
                    
        
        [EventSubscribe("StartOfSimulation")]
        private void OnSimulationCommencing(object sender, EventArgs e)
        {
        }       
        
        [EventSubscribe("DoManagement")]
        private void OnDoManagement(object sender, EventArgs e)
        {
        if (phenology.CurrentPhase.Name=="ReadyForHarvesting")
           {
           Chickpea.Harvest();
           //Chickpea.EndCrop();
           }
        }
        
        [EventSubscribe("DoManagementCalculations")]
        private void OnDoManagementCalculations(object sender, EventArgs e)
        {
            
        }
    }
}
```
        Plant Lentil
        Manager Sowing
          SowDate = 28-Jun
          CultivarName = Digger
          SowingDepth = 40
          RowSpacing = 250
          Population = 152
```csharp
using APSIM.Shared.Utilities;
using Models.Utilities;
using Models.Soils;
using Models.PMF;
using Models.Core;
using System;

namespace Models
{
    [Serializable]
    public class Script : Model
    {
        [Link] Clock Clock;
        [Link] Fertiliser Fertiliser;
        [Link] Summary Summary;
        [Link] Plant Canola;
        [Link] Soil Soil;
        Accumulator accumulatedRain;
        
        [Description("Sowing date (d-mmm)")]
        public string SowDate { get; set; }
        [Description("Cultivar to be sown")]
        public string CultivarName { get; set; }
        [Description("Sowing depth (mm)")]
        public double SowingDepth { get; set; }
        [Description("Row spacing (mm)")]
        public double RowSpacing { get; set; }
        [Description("Plant population (/m2)")]
        public double Population { get; set; }
        
        


        [EventSubscribe("DoManagement")]
        private void OnDoManagement(object sender, EventArgs e)
        {
        
            
            if (DateUtilities.WithinDates(SowDate, Clock.Today, SowDate))
            {
                Canola.Sow(population: Population, cultivar: CultivarName, depth: SowingDepth, rowSpacing: RowSpacing);    
            }
        
        }
        
    }
}
```
        Manager Irrigate on fixed dates
          Amount = 0
          IrrigateDates = 10-aug, 22-sep
          Depth = 0
          Efficiency = 1
          WillRunoff = False
          script: same as in Dooen2001.Factors.Permutation.Irr.Wet.Irrigate on fixed dates
        Soil: SoilType=Black Vertosol; LocalName=Waco; Site=Jimbour; NearestTown=Jimbour, Q 4352; Region=Sourth East Queensland; Country=Australia; NaturalVegetation=Grassland, mainly Qld bluegrass; Latitude=0; Longitude=0; DataSource=Daniel Rodriguez lentil expt
          Physical
            Thickness  ParticleSizeSand  ParticleSizeSilt  ParticleSizeClay  Rocks  BD    AirDry  LL15   DUL    SAT
            100        5                 65                30                0      1.2   0.1     0.145  0.384  0.54
            100        5                 65                30                0      1.37  0.11    0.145  0.375  0.419
            200        5                 65                30                0      1.28  0.14    0.197  0.405  0.487
            200        5                 65                30                0      1.38  0.16    0.21   0.391  0.468
            200        5                 65                30                0      1.4   0.19    0.24   0.373  0.449
            200        5                 65                30                0      1.45  0.19    0.243  0.343  0.427
            200        5                 65                30                0      1.45  0.19    0.28   0.32   0.389
            Rocks, ParticleSizeSand, ParticleSizeSilt, ParticleSizeClay source: Calculated
            SoilCrop LentilSoil: LL=[0.145, 0.145, 0.197, 0.21, 0.24, 0.243, 0.28]; KL=[0.08, 0.08, 0.08, 0.02, 0, 0, 0]; XF=[1, 1, 1, 1, 0.1, 0, 0]
              LL source: Field measured and checked for sensibility
            SoilCrop WheatSoil: LL=[0.145, 0.162333, 0.197, 0.21, 0.241, 0.254333, 0.28]; KL=[0.06, 0.06, 0.06, 0.06, 0.04, 0.04, 0.04]; XF=[1, 1, 1, 1, 1, 1, 1]
              LL, KL, XF source: Estimated
            SoilCrop SorghumSoil: LL=[0.145, 0.162333, 0.197, 0.21, 0.279169, 0.275482, 0.28]; KL=[0.07, 0.07, 0.07, 0.07, 0.05, 0.05, 0.05]; XF=[1, 1, 1, 1, 1, 1, 1]
              LL, KL, XF source: Estimated
            SoilCrop CottonSoil: LL=[0.145, 0.162333, 0.197, 0.21, 0.2664057, 0.267036, 0.28]; KL=[0.1, 0.1, 0.1, 0.1, 0.1, 0.095, 0.09]; XF=[1, 1, 1, 1, 1, 1, 1]
              LL, KL, XF source: Estimated
          WaterBalance SoilWater: SummerDate=1-Nov; SummerU=4; SummerCona=2; WinterDate=1-Apr; WinterU=2; WinterCona=2; DiffusConst=88; DiffusSlope=35.4; Salb=0.13; CN2Bare=72; CNRed=20; CNCov=0.8; DischargeWidth=0; CatchmentArea=0; PSIDul=-100; Thickness=[100, 100, 200, 200, 200, 200, 200]; SWCON=[0.2, 0.2, 0.2, 0.2, 0.2, 0.2, 0.2]
          Organic: FOMCNRatio=20; CarbonUnits=Total
            Thickness  Carbon  SoilCNRatio  FBiom  FInert  FOM
            100        1.456   14.5         0.02   0.36    347.129
            100        1.456   14.5         0.02   0.36    270.344
            200        1.001   14.5         0.015  0.5     163.972
            200        0.65    14.5         0.01   0.59    99.4541
            200        0.52    14.5         0.01   0.84    60.322
            200        0.364   14.5         0.01   0.8     36.5871
            200        0.299   14.5         0.01   0.8     22.1912
          Chemical: Thickness=[100, 100, 200, 200, 200, 200, 200]; PH=[8.2, 8.5, 9.1, 9.2, 8.9, 9.02, 9]; PHUnits=Water
          Water: Thickness=[100, 100, 200, 200, 200, 200, 200]; InitialValues=[0.31, 0.24, 0.21, 0.22, 0.245, 0.24, 0.257]; InitialPAWmm=26.4; RelativeTo=LL15; FilledFromTop=false
          CERESSoilTemperature Temperature
          Solute NO3: Thickness=[100, 100, 200, 200, 200, 200, 200]; InitialValues=[11.04, 10.412, 12.544, 7.452, 4.2, 5.22, 4.06]; InitialValuesUnits=ppm; WaterTableConcentration=0; D0=0; DepthConstant=0; MaxDepthSoluteAccessible=0; RunoffEffectivenessAtMovingSolute=0; MaxEffectiveRunoff=0
          Solute NH4: Thickness=[100, 100, 200, 200, 200, 200, 200]; InitialValues=[0.36, 0.411, 0.768, 0.828, 0.84, 0.87, 0.87]; InitialValuesUnits=ppm; WaterTableConcentration=0; D0=0; DepthConstant=0; MaxDepthSoluteAccessible=0; RunoffEffectivenessAtMovingSolute=0; MaxEffectiveRunoff=0
          Solute Urea: Thickness=[100, 100, 200, 200, 200, 200, 200]; InitialValues=[0, 0, 0, 0, 0, 0, 0]; InitialValuesUnits=kg/ha; WaterTableConcentration=0; D0=0; DepthConstant=0; MaxDepthSoluteAccessible=0; RunoffEffectivenessAtMovingSolute=0; MaxEffectiveRunoff=0
          Nutrient
        Report SowingReport: EventNames=[Clock].EndOfDay
        Manager SetCropParameters
  Experiment Caragabal19
    Memo
      Starting soil water taken in April 2019 - assumed the 15th.
    Factors
      Memo
        **Factors at Caragabal**

        ***Time of sowing***

        1. 8 May, 2019
        2. 17 June, 2019
        Only 2 TOS physically possible due to lack of rain.

        ***Cultivar***

        PBA Jumbo 2
        PBA Blitz
        PBA Ace
        PBA Hallmark XT
        PBA Greenfield
      Permutation
        Factor TOS
          CompositeFactor 1: Specifications=[Sowing].Script.SowDate = 8-May
          CompositeFactor 2: Specifications=[Sowing].Script.SowDate = 17-Jun
        Factor Cv
          Specification=[Sowing].Script.CultivarName = Blitz,Bolt,Greenfield,HallmarkXT,Jumbo2
    Simulation Caragabal19
      Weather: FileName=ExNeil\LentilNextGen\CaragabalPO.met; Latitude=-33.8442; Tav=16.88; Amp=17.15
      Clock: Start=2019-04-01; End=2019-12-31
      Summary summaryfile
      SoilArbitrator Soil Arbitrator
      Zone Field: Area=1; Slope=0; AspectAngle=0; Altitude=50
        MicroClimate: a_interception=0; b_interception=1; c_interception=0; d_interception=0; SoilHeatFluxFraction=0.4; MinimumHeightDiffForNewLayer=0; NightInterceptionFraction=0.5; ReferenceHeight=1
        Irrigation
        Fertiliser
        SurfaceOrganicMatter: InitialResidueName=maize; InitialResidueType=maize; InitialResidueMass=500; InitialStandingFraction=0; InitialCPR=0; InitialCNR=65
        Report DailyReport: EventNames=[Clock].DoReport
        Report HarvestReport: EventNames=[Chickpea].Harvesting
        Manager Harvesting: same as Dooen2001.DR_2001DooenWet.Field.Harvesting
        Plant Lentil
        Manager Sowing
          SowDate = 25-Apr
          CultivarName = Jumbo2
          SowingDepth = 50
          RowSpacing = 230
          Population = 110
          script: same as in Dooen2001.DR_2001DooenWet.Field.Sowing
        Manager Reset on date
          ResetDate = 15-Apr
          ResetWater = Yes
          ResetSOM = No
```csharp
using Models.Interfaces;
using System;
using Models.Core;
using Models.PMF;
using Models.Soils;
using Models.Utilities;
using Models.Surface;
using APSIM.Shared.Utilities;

namespace Models
{
    [Serializable]
    public class Script : Model
    {
        [Link] private Clock Clock;
        [Link] private Plant Wheat;
        [Link] private ISoilWater SoilWater;
        [Link] private SurfaceOrganicMatter SOM;
        [Link] private Summary Summary;

        [Description("Date to reset on:")]
        public string ResetDate {get;set;}

        [Description("Reset Water? (Yes or No)")]
        public string ResetWater {get;set;}

        [Description("Reset Surface Organic Matter? (Yes or No)")]
        public string ResetSOM {get;set;}

        [EventSubscribe("DoManagement")]
        private void OnDoManagement(object sender, EventArgs e)
        {
            if (DateUtilities.WithinDates(ResetDate, Clock.Today, ResetDate))
            {
                if (ResetWater == "Yes")
                {
                    Summary.WriteMessage(this, "Reset Water", MessageType.Diagnostic);
                    SoilWater.Reset();
                }
                if (ResetSOM == "Yes")
                {
                    Summary.WriteMessage(this, "Reset Surface OM", MessageType.Diagnostic);
                    SOM.Reset();
                }
            }
        }
    }
}
```
        Soil: ASCOrder=Vertosol; SoilType=Clay; Site=Generic-Qld; State=Generic; Country=Australia; NaturalVegetation=NA; ApsoilNumber=517-GENERIC; Latitude=-27.183286; Longitude=151.263748; LocationAccuracy=Regional Soil Type; DataSource=Generic soil. CSIRO Sustainable Ecosystems, Toowoomba
          Comments=Generic soil developed by Allan Peake. 'Typical Vertosol' soil properties have been calculated as the average of vertosols with similar characteristics from within the Apsoil database. Groupings were made on the basis of bulk density. Measured BD, DUL and CLL for the groups were then averaged to derive the characteristics of the typical Vertosols. They can then be used in conjunction with measured soil water to simplify the selection of appropriate Vertosols, for paddocks where full soil characterisations have not yet been completed. For more information see Peake et al. 2010: ‘A rapid method for estimating the plant available water capacity of Vertosols’, 2010 Australian Agronomy Conference. Typical Vertosols are different to 'Generic' soil types elsewhere in the Apsoil database, which are representative of certain soil types and districts, but have not been calculated from large numbers of similar, characterised soils.
          Memo
            Typvert Vertosol No5 (PAWC-226 No517-Generic)
          Physical
            Thickness  ParticleSizeSand  ParticleSizeSilt  ParticleSizeClay  Rocks  BD    AirDry  LL15   DUL    SAT
            150        5                 65                30                0      1.2   0.119   0.238  0.468  0.518
            150        5                 65                30                0      1.23  0.197   0.246  0.457  0.507
            300        5                 65                30                0      1.26  0.263   0.263  0.446  0.496
            300        5                 65                30                0      1.3   0.263   0.263  0.43   0.48
            300        5                 65                30                0      1.34  0.263   0.263  0.413  0.463
            300        5                 65                30                0      1.37  0.263   0.263  0.403  0.453
            300        5                 65                30                0      1.37  0.263   0.263  0.401  0.451
            Rocks, ParticleSizeSand, ParticleSizeSilt, ParticleSizeClay source: Calculated
            SoilCrop LentilSoil: LL=[0.228, 0.227626, 0.263, 0.276, 0.306, 0.337, 0.401]; KL=[0.045, 0.045, 0.045, 0.03, 0.025, 0.02, 0.01]; XF=[1, 1, 1, 1, 1, 1, 1]
              LL source: Field measured and checked for sensibility
            SoilCrop ChickpeaSoil: same as Caragabal19.Caragabal19.Field.soil.Physical.LentilSoil
            SoilCrop WheatSoil: LL=[0.238, 0.246, 0.263, 0.276, 0.306, 0.337, 0.376]; KL=[0.06, 0.06, 0.06, 0.04, 0.04, 0.02, 0.02]; XF=[1, 1, 1, 1, 1, 1, 1]
              LL source: Field measured and checked for sensibility
          WaterBalance SoilWater: SummerDate=1-Nov; SummerU=6; SummerCona=3.5; WinterDate=1-Apr; WinterU=4; WinterCona=2.5; DiffusConst=40; DiffusSlope=16; Salb=0.12; CN2Bare=73; CNRed=20; CNCov=0.8; PSIDul=-100; Thickness=[150, 150, 300, 300, 300, 300, 300]; SWCON=[0.3, 0.3, 0.3, 0.3, 0.3, 0.3, 0.3]
          Organic: FOMCNRatio=40; CarbonUnits=Total
            Thickness  Carbon  SoilCNRatio  FBiom  FInert  FOM
            150        1.3     12           0.04   0.4     347.129
            150        1.04    12           0.02   0.6     270.344
            300        0.65    12           0.02   0.8     163.972
            300        0.325   12           0.02   1       99.4541
            300        0.195   12           0.01   1       60.322
            300        0.13    12           0.01   1       36.5871
            300        0.13    12           0.01   1       22.1912
          Chemical: Thickness=[150, 150, 300, 300, 300, 300, 300]; PH=[6.7, 6.9, 7.7, 8.3, 8.5, 8.7, 8.5]; PHUnits=Water
          CERESSoilTemperature Temperature
          Water: Thickness=[100, 200, 300, 300, 300, 300, 300]; InitialValues=[0.234, 0.291, 0.279, 0.29, 0.322, 0.335, 0.327]; InitialPAWmm=80.4; RelativeTo=LL15; FilledFromTop=false
          Solute NO3: Thickness=[150, 150, 300, 300, 300, 300, 300]; InitialValues=[8, 5, 3, 1, 1, 1, 1]; InitialValuesUnits=ppm; WaterTableConcentration=0; D0=0; DepthConstant=0; MaxDepthSoluteAccessible=0; RunoffEffectivenessAtMovingSolute=0; MaxEffectiveRunoff=0
          Solute NH4: same as ControlledEnvironment.Roberts1988.ReadingCE.Field.Soil.NO3
          Solute Urea: same as ControlledEnvironment.Roberts1988.ReadingCE.Field.Soil.Urea
          Nutrient
        Report SowingReport: EventNames=[Clock].EndOfDay
        Manager SetCropParameters
  Experiment Emerald19
    Factors
      Memo
        **Factors at Emerald**

        ***Time of sowing***

        1. 10 May, 2019
        2. 3 June, 2019
        3. 27 June, 2019

        ***Cultivar***

        ***PBA Bolt*** - this cultivar was not part of the original experiment design but was sown in the filler rows in a way consistent with sowings of the other cultivars that formed part of the experiment. The reliability of the data for *should* be the same as for the other cultivars but should also be evaluated in light of this information.
        PBA Ace
        PBA Blitz
        PBA Greenfield
        PBA Hallmark XT
        PBA Jumbo

        May 10 plant – lentil emerged 16/5 ; chickpeas emerged about 19/5
        June 3 plant – lentil emerged about 12-13/6 ; chickpeas emerged about 15/6
        June 27 plant – lentil emerged about 7-8/7 ; chickpeas emerged 9-10/7

        I don’t recall if the desi and kabuli have different emergence dates but the lentil was fast and was always the first to emerge. Lentil seems to have plenty of vigour. If there were emergence differences between the chickpeas, it was minor.
      Permutation
        Factor TOS
          CompositeFactor 1
            Specifications:
              [Sowing].Script.SowDate = 10-May
              [Reset on date]
              [Water].Thickness=150,150,300,300,300,300,300
              [Water].InitialValues=0.366,0.369,0.378,0.329,0.338,0.326,0.326
            Manager Reset on date
              ResetDate = 14-May
              ResetWater = Yes
              ResetSOM = No
              script: same as in Caragabal19.Caragabal19.Field.Reset on date
          CompositeFactor 2
            Specifications:
              [Sowing].Script.SowDate = 03-Jun
              [Reset on date]
              [Water].Thickness=150,150,300,300,300,300,300
              [Water].InitialValues=0.35,0.352,0.38,0.353,0.341,0.326,0.326
            Manager Reset on date
              ResetDate = 6-Jun
              ResetWater = Yes
              ResetSOM = No
              script: same as in Caragabal19.Caragabal19.Field.Reset on date
          CompositeFactor 3
            Specifications:
              [Sowing].Script.SowDate = 27-Jun
              [Reset on date]
              [Water].Thickness=150,150,300,300,300,300,300
              [Water].InitialValues=0.331,0.333,0.342,0.314,0.328,0.326,0.326
            Manager Reset on date
              ResetDate = 2-Jul
              ResetWater = Yes
              ResetSOM = No
              script: same as in Caragabal19.Caragabal19.Field.Reset on date
        Factor Cv
          Specification=[Sowing].Script.CultivarName = Bolt, Ace, Blitz, Greenfield, HallmarkXT, Jumbo2
    Simulation Emerald19
      Memo
        Questions:

        * availability of grain weight - question over WC
      Memo
        Emerald Site run by DAFQ, site leader was Doug Sands, assisted by Peter Agius
      Weather: FileName=ExNeil\LentilNextGen\Emerald2019Combo.met; Latitude=-23.47; Tav=23.95; Amp=14.26
      Clock: Start=2019-05-01; End=2019-10-31
      Summary summaryfile
      SoilArbitrator Soil Arbitrator
      Zone Field: Area=1; Slope=0; AspectAngle=0; Altitude=50
        MicroClimate: a_interception=0; b_interception=1; c_interception=0; d_interception=0; SoilHeatFluxFraction=0.4; MinimumHeightDiffForNewLayer=0; NightInterceptionFraction=0.5; ReferenceHeight=1
        Irrigation
        Fertiliser
        SurfaceOrganicMatter: InitialResidueName=maize; InitialResidueType=maize; InitialResidueMass=500; InitialStandingFraction=0; InitialCPR=0; InitialCNR=65
        Report DailyReport: same as Dooen2001.DR_2001DooenWet.Field.DailyReport
        Report HarvestReport: EventNames=[Lentil].Harvesting
          VariableNames:
            [Clock].Today
            [Lentil].Phenology.CurrentStageName as Stage
            [Lentil].Phenology.FloweringDAS as FloweringDAS
            [Lentil].Phenology.MaturityDAS as MaturityDAS
            [Lentil].Grain.Live.Wt as GrainWt
            [Lentil].AboveGround.Wt
        Manager Harvesting: same as Dooen2001.DR_2001DooenWet.Field.Harvesting
        Plant Lentil
        Manager Sowing
          SowDate = 25-Apr
          CultivarName = Amethyst
          SowingDepth = 50
          RowSpacing = 500
          Population = 120
          script: same as in Dooen2001.DR_2001DooenWet.Field.Sowing
        Soil: ASCOrder=Vertosol; SoilType=Clay; Site=Generic-Qld; State=Generic; Country=Australia; NaturalVegetation=NA; ApsoilNumber=519-GENERIC; Latitude=-27.183286; Longitude=151.263748; LocationAccuracy=Regional Soil Type; DataSource=Generic soil. CSIRO Sustainable Ecosystems, Toowoomba
          Comments=Generic soil developed by Allan Peake. 'Typical Vertosol' soil properties have been calculated as the average of vertosols with similar characteristics from within the Apsoil database. Groupings were made on the basis of bulk density. Measured BD, DUL and CLL for the groups were then averaged to derive the characteristics of the typical Vertosols. They can then be used in conjunction with measured soil water to simplify the selection of appropriate Vertosols, for paddocks where full soil characterisations have not yet been completed. For more information see Peake et al. 2010: ‘A rapid method for estimating the plant available water capacity of Vertosols’, 2010 Australian Agronomy Conference. Typical Vertosols are different to 'Generic' soil types elsewhere in the Apsoil database, which are representative of certain soil types and districts, but have not been calculated from large numbers of similar, characterised soils.
          Memo
            This soil is AP's generic soil Vertosol_No7
          Physical
            Thickness  BD    AirDry  LL15   DUL    SAT
            150        1.33  0.109   0.217  0.418  0.468
            150        1.34  0.18    0.225  0.413  0.463
            300        1.34  0.244   0.244  0.414  0.464
            300        1.37  0.244   0.244  0.404  0.454
            300        1.41  0.244   0.244  0.39   0.44
            300        1.43  0.244   0.244  0.382  0.432
            300        1.44  0.244   0.244  0.377  0.427
            SoilCrop LentilSoil: LL=[0.217, 0.225, 0.244, 0.262, 0.294, 0.324, 0.356]; KL=[0.045, 0.045, 0.045, 0.03, 0.025, 0.02, 0.01]; XF=[1, 1, 1, 1, 1, 1, 1]
              LL source: Field measured and checked for sensibility
            SoilCrop ChickpeaSoil: same as Emerald19.Emerald19.Field.soil.Physical.LentilSoil
            SoilCrop CottonSoil: LL=[0.217, 0.225, 0.244, 0.262, 0.294, 0.324, 0.356]; KL=[0.1, 0.1, 0.1, 0.1, 0.09, 0.07, 0.05]; XF=[1, 1, 1, 1, 1, 1, 1]
              LL source: Field measured and checked for sensibility
            SoilCrop SorghumSoil: LL=[0.217, 0.225, 0.244, 0.262, 0.294, 0.324, 0.356]; KL=[0.07, 0.07, 0.07, 0.05, 0.05, 0.04, 0.03]; XF=[1, 1, 1, 1, 1, 1, 1]
              LL source: Field measured and checked for sensibility
          WaterBalance SoilWater: same as Caragabal19.Caragabal19.Field.soil.SoilWater
          Organic: same as Caragabal19.Caragabal19.Field.soil.Organic
          Chemical: Thickness=[150, 150, 300, 300, 300, 300, 300]; PH=[8.4, 8.6, 8.6, 8, 7.1, 6.5, 6.5]; PHUnits=Water
          CERESSoilTemperature Temperature
          Water: Thickness=[150, 150, 300, 300, 300, 300, 300]; InitialValues=[0.326, 0.328, 0.345, 0.36, 0.359, 0.326, 0.326]; InitialPAWmm=180.6; RelativeTo=LL15; FilledFromTop=false
          Solute NO3: InitialValuesUnits=ppm; WaterTableConcentration=0; D0=0; DepthConstant=0; MaxDepthSoluteAccessible=0; RunoffEffectivenessAtMovingSolute=0; MaxEffectiveRunoff=0
          Solute NH4: InitialValuesUnits=ppm; WaterTableConcentration=0; D0=0; DepthConstant=0; MaxDepthSoluteAccessible=0; RunoffEffectivenessAtMovingSolute=0; MaxEffectiveRunoff=0
          Solute Urea: same as ControlledEnvironment.Roberts1988.ReadingCE.Field.Soil.Urea
          Nutrient
        Manager Reset on date: same as Emerald19.Factors.Permutation.TOS.1.Reset on date
        Report SowingReport: EventNames=[Clock].EndOfDay
        Manager SetCropParameters
  Experiment Gatton19
    Memo
      **Gatton phenology trial:**

      * all treatments are irrigated - specific dates and amounts provided by Ian Lee Long

      * only treatments without lights used

      * phenology measurements up until the time of flowering only are recorded

      * phenological stages will change in apsim as the lentil model is developed:

      From AP: "For the moment:
      NextGen term ‘Start flowering’ – is actually 50% budding.
      NextGen term ‘End flowering’ – is actually 50% flowering.
      And I haven’t yet restructured to do a start podding."

      **Met file** - taken from SILO (same as Jeremy Whish)

      **Simulation started** 15/4, the day before the first irrigation.

      **Soil properties** -

      * Initial SW is unknown - set at 50%

      * Lentil Soil properties may require fine-tuning
    Factors
      Memo
        **Factors at Gatton phenology trial**

        ***Time of sowing - ***

        1. 10 May, 2019
        2. 7 June, 2019
        3. 19 July, 2019

        ***Cultivar - numerous but we select the following subset to work on***

        PBA Ace
        PBA Blitz
        PBA Bolt
        Digger
        PBA Greenfield
        PBA Hallmark XT
        PBA Jumbo
        Nugget
      Permutation
        Factor TOS
          CompositeFactor 1: Specifications=[Sowing].Script.SowDate = 10-May
          CompositeFactor 2: Specifications=[Sowing].Script.SowDate = 7-Jun
          CompositeFactor 3: Specifications=[Sowing].Script.SowDate = 19-Jul
        Factor Cv
          Specification=[Sowing].Script.CultivarName = Ace, Blitz, Bolt, Digger, Greenfield, HallmarkXT, Jumbo2, Nugget
    Simulation GattonPhen19
      Weather: FileName=ExNeil\LentilNextGen\GattonUQ.met; Latitude=-27.5436; Tav=20.11; Amp=12.5
      Clock: Start=2019-04-15; End=2019-12-30
      Summary summaryfile
      SoilArbitrator Soil Arbitrator
      Zone Field: Area=1; Slope=0; AspectAngle=0; Altitude=50
        MicroClimate: a_interception=0; b_interception=1; c_interception=0; d_interception=0; SoilHeatFluxFraction=0.4; MinimumHeightDiffForNewLayer=0; NightInterceptionFraction=0.5; ReferenceHeight=1
        Irrigation
        Fertiliser
        SurfaceOrganicMatter: InitialResidueName=maize; InitialResidueType=maize; InitialResidueMass=500; InitialStandingFraction=0; InitialCPR=0; InitialCNR=65
        Report DailyReport: same as Dooen2001.DR_2001DooenWet.Field.DailyReport
        Report HarvestReport: EventNames=[Chickpea].Harvesting
          VariableNames:
            [Clock].Today
            [Lentil].Phenology.CurrentStageName as Stage
            [Lentil].Phenology.FloweringDAS as FloweringDAS
            [Lentil].Phenology.MaturityDAS as MaturityDAS
            [Lentil].Grain.Live.Wt as GrainWt
            [Lentil].AboveGround.Wt
        Manager Harvesting: same as Dooen2001.DR_2001DooenWet.Field.Harvesting
        Plant Lentil
        Manager Sowing
          SowDate = 30-Apr
          CultivarName = Amethyst
          SowingDepth = 50
          RowSpacing = 230
          Population = 120
          script: same as in Dooen2001.DR_2001DooenWet.Field.Sowing
        Manager Irrigate on fixed dates
          Amount = 7
          IrrigateDates = 16-apr
          Depth = 0
          Efficiency = 1
          WillRunoff = False
          script: same as in Dooen2001.Factors.Permutation.Irr.Wet.Irrigate on fixed dates
        Manager Irrigate on fixed dates1
          Amount = 9
          IrrigateDates = 23-apr
          Depth = 0
          Efficiency = 1
          WillRunoff = False
          script: same as in Dooen2001.Factors.Permutation.Irr.Wet.Irrigate on fixed dates
        Manager Irrigate on fixed dates2
          Amount = 10
          IrrigateDates = 26-apr
          Depth = 0
          Efficiency = 1
          WillRunoff = False
          script: same as in Dooen2001.Factors.Permutation.Irr.Wet.Irrigate on fixed dates
        Manager Irrigate on fixed dates3
          Amount = 4
          IrrigateDates = 10-may, 7-jun
          Depth = 0
          Efficiency = 1
          WillRunoff = False
          script: same as in Dooen2001.Factors.Permutation.Irr.Wet.Irrigate on fixed dates
        Manager Irrigate on fixed dates4
          Amount = 18
          IrrigateDates = 20-jul
          Depth = 0
          Efficiency = 1
          WillRunoff = False
          script: same as in Dooen2001.Factors.Permutation.Irr.Wet.Irrigate on fixed dates
        Manager Irrigate on fixed dates5
          Amount = 11
          IrrigateDates = 31-jul
          Depth = 0
          Efficiency = 1
          WillRunoff = False
          script: same as in Dooen2001.Factors.Permutation.Irr.Wet.Irrigate on fixed dates
        Manager Irrigate on fixed dates6
          Amount = 18
          IrrigateDates = 14-aug
          Depth = 0
          Efficiency = 1
          WillRunoff = False
          script: same as in Dooen2001.Factors.Permutation.Irr.Wet.Irrigate on fixed dates
        Manager Irrigate on fixed dates7
          Amount = 15
          IrrigateDates = 27-aug
          Depth = 0
          Efficiency = 1
          WillRunoff = False
          script: same as in Dooen2001.Factors.Permutation.Irr.Wet.Irrigate on fixed dates
        Manager Irrigate on fixed dates8
          Amount = 18
          IrrigateDates = 13-sep
          Depth = 0
          Efficiency = 1
          WillRunoff = False
          script: same as in Dooen2001.Factors.Permutation.Irr.Wet.Irrigate on fixed dates
        Soil TypVert2: ASCOrder=Vertosol; SoilType=Clay; Site=Generic-Qld; State=Generic; Country=Australia; NaturalVegetation=NA; ApsoilNumber=514-GENERIC; Latitude=-27.183286; Longitude=151.263748; LocationAccuracy=Regional Soil Type; DataSource=Generic soil. CSIRO Sustainable Ecosystems, Toowoomba
          Comments=Generic soil developed by Allan Peake. 'Typical Vertosol' soil properties have been calculated as the average of vertosols with similar characteristics from within the Apsoil database. Groupings were made on the basis of bulk density. Measured BD, DUL and CLL for the groups were then averaged to derive the characteristics of the typical Vertosols. They can then be used in conjunction with measured soil water to simplify the selection of appropriate Vertosols, for paddocks where full soil characterisations have not yet been completed. For more information see Peake et al. 2010: ‘A rapid method for estimating the plant available water capacity of Vertosols’, 2010 Australian Agronomy Conference. Typical Vertosols are different to 'Generic' soil types elsewhere in the Apsoil database, which are representative of certain soil types and districts, but have not been calculated from large numbers of similar, characterised soils.
          Memo
            Initial SW is a guess - set at 50%.
          Physical
            Thickness  BD    AirDry  LL15   DUL    SAT
            150        1.06  0.13    0.259  0.519  0.569
            150        1.09  0.217   0.271  0.508  0.558
            300        1.11  0.295   0.295  0.501  0.551
            300        1.13  0.295   0.295  0.494  0.544
            300        1.18  0.295   0.295  0.474  0.524
            300        1.23  0.295   0.295  0.457  0.507
            300        1.25  0.295   0.295  0.45   0.5
            SoilCrop LentilSoil: LL=[0.259, 0.271, 0.295, 0.31, 0.34, 0.368, 0.414]; KL=[0.045, 0.045, 0.045, 0.03, 0.02, 0.02, 0.01]; XF=[1, 1, 1, 1, 1, 1, 1]
              LL source: Field measured and checked for sensibility
            SoilCrop WheatSoil: LL=[0.259, 0.271, 0.295, 0.31, 0.34, 0.368, 0.414]; KL=[0.06, 0.06, 0.06, 0.04, 0.04, 0.02, 0.02]; XF=[1, 1, 1, 1, 1, 1, 1]
              LL source: Field measured and checked for sensibility
            SoilCrop CottonSoil: LL=[0.259, 0.271, 0.295, 0.31, 0.34, 0.368, 0.414]; KL=[0.1, 0.1, 0.1, 0.1, 0.09, 0.07, 0.05]; XF=[1, 1, 1, 1, 1, 1, 1]
              LL source: Field measured and checked for sensibility
            SoilCrop SorghumSoil: LL=[0.259, 0.271, 0.295, 0.31, 0.34, 0.368, 0.414]; KL=[0.07, 0.07, 0.07, 0.05, 0.05, 0.04, 0.03]; XF=[1, 1, 1, 1, 1, 1, 1]
              LL source: Field measured and checked for sensibility
          WaterBalance SoilWater: same as Caragabal19.Caragabal19.Field.soil.SoilWater
          Organic: FOMCNRatio=40; CarbonUnits=Total
            Thickness  Carbon  SoilCNRatio  FBiom  FInert  FOM
            150        1.43    12           0.04   0.4     347.129
            150        1.144   12           0.02   0.6     270.344
            300        0.715   12           0.02   0.8     163.972
            300        0.3575  12           0.02   1       99.4541
            300        0.2145  12           0.01   1       60.322
            300        0.143   12           0.01   1       36.5871
            300        0.143   12           0.01   1       22.1912
          Chemical: Thickness=[150, 150, 300, 300, 300, 300, 300]; PH=[7.3, 7.7, 8.1, 8.5, 8.5, 8.6, 8.6]; PHUnits=Water
          Water: Thickness=[150, 150, 300, 300, 300, 300, 300]; InitialValues=[0.389, 0.3895, 0.398, 0.3945, 0.3845, 0.376, 0.3725]; InitialPAWmm=172.425; RelativeTo=LL15; FilledFromTop=false
          CERESSoilTemperature Temperature
          Solute NO3: Thickness=[1800]; InitialValues=[30]; InitialValuesUnits=ppm; WaterTableConcentration=0; D0=0; DepthConstant=0; MaxDepthSoluteAccessible=0; RunoffEffectivenessAtMovingSolute=0; MaxEffectiveRunoff=0
          Solute NH4: Thickness=[1800]; InitialValues=[5]; InitialValuesUnits=ppm; WaterTableConcentration=0; D0=0; DepthConstant=0; MaxDepthSoluteAccessible=0; RunoffEffectivenessAtMovingSolute=0; MaxEffectiveRunoff=0
          Solute Urea: same as ControlledEnvironment.Roberts1988.ReadingCE.Field.Soil.Urea
          Nutrient
        Report SowingReport: EventNames=[Clock].EndOfDay
        Manager SetCropParameters
  Experiment Greenethorpe19
    Memo
      Planting density information by TOS was available. It differed broadly by TOS and so average density for TOS used for all cvv.

      FIX: TOS2 irrigation only

      **Met file** - taken from SILO (same as Jeremy Whish)
    Factors
      Memo
        **Factors at Greenethorpe**

        ***Time of sowing***

        1. 30 April, 2019
        2. 21 May, 2019
        3. 12 June, 2019

        Initial SW at TOS based on 15/4 measurement for all TOS; measurement of SW for irrig and dryland treatments averaged for TOS since first irrigation not applied until after this measurement.

        ***Cultivar***

        PBA Ace
        PBA Blitz
        PBA Jumbo2
      Permutation
        Factor TOS
          CompositeFactor 1
            Specifications:
              [Sowing].Script.SowDate = 30-Apr
              [Sowing].Script.Population = 146
              [IrrigateOnSow_TOS2only].Script.Amount = 0.0
          CompositeFactor 2
            Specifications:
              [Sowing].Script.SowDate = 21-May
              [Sowing].Script.Population = 126
              [IrrigateOnSow_TOS2only].Script.Amount = 15
          CompositeFactor 3
            Specifications:
              [Sowing].Script.SowDate = 12-Jun
              [Sowing].Script.Population = 134
              [IrrigateOnSow_TOS2only].Script.Amount = 0.0
        Factor Cv: Specification=[Sowing].Script.CultivarName = Ace, Blitz, Jumbo2
        Factor Irr
          CompositeFactor Dryland: Specifications=[IrrigateFixedDates].Script.Amount = 0.0
          CompositeFactor Irrigated: Specifications=[IrrigateFixedDates].Script.Amount = 10.0
    Simulation Greenethorpe19
      Weather: FileName=ExNeil\LentilNextGen\GreenethorpeSILO.met; Latitude=-34.0824; Tav=15.07; Amp=16.55
      Clock: Start=2019-04-12; End=2019-12-30
      Summary summaryfile
      SoilArbitrator Soil Arbitrator
      Zone Field: Area=1; Slope=0; AspectAngle=0; Altitude=50
        MicroClimate: a_interception=0; b_interception=1; c_interception=0; d_interception=0; SoilHeatFluxFraction=0.4; MinimumHeightDiffForNewLayer=0; NightInterceptionFraction=0.5; ReferenceHeight=1
        Irrigation
        Fertiliser
        SurfaceOrganicMatter: InitialResidueName=maize; InitialResidueType=maize; InitialResidueMass=500; InitialStandingFraction=0; InitialCPR=0; InitialCNR=65
        Report DailyReport: same as Dooen2001.DR_2001DooenWet.Field.DailyReport
        Report HarvestReport: EventNames=[Chickpea].Harvesting
          VariableNames:
            [Clock].Today
            [Lentil].Phenology.CurrentStageName as Stage
            [Lentil].Phenology.FloweringDAS as FloweringDAS
            [Lentil].Phenology.MaturityDAS as MaturityDAS
            [Lentil].Grain.Live.Wt as GrainWt
            [Lentil].AboveGround.Wt
        Manager Harvesting: same as Dooen2001.DR_2001DooenWet.Field.Harvesting
        Plant Lentil
        Manager Sowing: same as Gatton19.GattonPhen19.Field.Sowing
        Manager Reset on date
          ResetDate = 12-apr
          ResetWater = Yes
          ResetSOM = No
          script: same as in Caragabal19.Caragabal19.Field.Reset on date
        Manager Fertilise at sowing
          Crop = [Lentil]
          FertiliserType = UreaN
          Amount = 4
```csharp
using Models.Soils;
using System;
using Models.Core;
using Models.PMF;
namespace Models
{
    [Serializable]
    public class Script : Model
    {
        [Link] Clock Clock;
        [Link] Fertiliser Fertiliser;
        
        [Description("Crop to be fertilised")]
        public IPlant Crop { get; set; }

        [Description("Type of fertiliser to apply? ")] public Fertiliser.Types FertiliserType { get; set; }

    
        [Description("Amount of fertiliser to be applied (kg/ha)")]
        public double Amount { get; set; }
        
        [EventSubscribe("Sowing")]
        private void OnSowing(object sender, EventArgs e)
        {
            Model crop = sender as Model;
            if (Crop != null && crop.Name.ToLower() == (Crop as IModel).Name.ToLower())
                Fertiliser.Apply(Amount: Amount, Type: FertiliserType);
        }
        
    }
}
```
        Manager IrrigateOnSow_TOS2only
          Amount = 15
          IrrigateDates = 21-may
          Depth = 0
          Efficiency = 0.8
          WillRunoff = False
          script: same as in Dooen2001.Factors.Permutation.Irr.Wet.Irrigate on fixed dates
        Manager IrrigateFixedDates
          Amount = 10
          IrrigateDates = 13-aug, 14-aug, 15-aug, 26-aug, 31-aug, 03-sep, 25-sep, 30-sep, 1-oct
          Depth = 0
          Efficiency = 0.8
          WillRunoff = False
          script: same as in Dooen2001.Factors.Permutation.Irr.Wet.Irrigate on fixed dates
        Soil: SoilType=SNSW; Site=Front paddock; NearestTown=Young; Region=Southern NSW; State=NSW; Country=Australia; Latitude=0; Longitude=0; DataSource=Kirkegaard/Lilley
          Memo
            The soil for Greenethorpe was developed by Julianne Lilley:

            "Hi Elizabeth,

            Laura and I did a bit of playing around with this soil as I initially adapted something from a Young soil that I had characterised. The simulation I took it from was called Y:\WORK\OCP modelling\Greenethorpe_Iandra\greenethorpe_2013 and was saved on 16 jan 2019 , so this may be the last file we used. Jeremy has also been simulating at the Iandra site, so he may be worth asking, but I know he is not back at work yet.  Anyway this soil will be a good place to start.

            Cheers
            Julianne"

            **HOWEVER** this has not been added here yet. Julianne's version includes many narrow layers that I suspect will be inconsistent with the field data. So, JL's version may need to be altered.
          Physical
            Thickness  ParticleSizeSand  ParticleSizeSilt  ParticleSizeClay  Rocks  BD     AirDry  LL15  DUL    SAT
            100        5                 65                30                0.306  1.38   0.05    0.1   0.25   0.28
            100        5                 65                30                0.387  1.38   0.1     0.1   0.211  0.241
            200        5                 65                30                0.315  1.547  0.15    0.15  0.27   0.32
            200        5                 65                30                0.186  1.5    0.17    0.17  0.33   0.38
            200        5                 65                30                0.125  1.474  0.16    0.16  0.32   0.38
            200        5                 65                30                0      1.479  0.15    0.15  0.29   0.31
            200        5                 65                30                0      1.52   0.15    0.15  0.29   0.31
            200        5                 65                30                0      1.547  0.14    0.14  0.27   0.3
            200        5                 65                30                0      1.566  0.14    0.14  0.27   0.3
            200        5                 65                30                0      1.567  0.15    0.15  0.3    0.32
            Rocks, ParticleSizeSand, ParticleSizeSilt, ParticleSizeClay source: Calculated
            SoilCrop LentilSoil
              LL=[0.1, 0.1, 0.15, 0.2, 0.21, 0.23, 0.24, 0.26, 0.27, 0.29]
              KL=[0.045, 0.045, 0.045, 0.045, 0.03, 0.02, 0.02, 0.02, 0.02, 0.01]
              XF=[1, 1, 1, 1, 1, 1, 0, 0, 0, 0]
          WaterBalance SoilWater: SummerDate=1-Nov; SummerU=6; SummerCona=3.5; WinterDate=1-Apr; WinterU=4; WinterCona=2.5; DiffusConst=40; DiffusSlope=16; Salb=0.12; CN2Bare=73; CNRed=20; CNCov=0.8; PSIDul=-100; Thickness=[100, 100, 200, 200, 200, 200, 200, 200, 200, 200]; SWCON=[0.3, 0.3, 0.3, 0.3, 0.3, 0.3, 0.3, 0.3, 0.3, 0.3]
          Organic: FOMCNRatio=40; CarbonUnits=Total
            Thickness  Carbon  SoilCNRatio  FBiom  FInert  FOM
            100        1       12           0.06   0.01    347.129
            100        0.35    12           0.05   0.01    270.344
            200        0.22    12           0.035  0.35    163.972
            200        0.22    12           0.015  0.425   99.4541
            200        0.18    12           0.01   0.55    60.322
            200        0.135   12           0.01   0.75    36.5871
            200        0.105   12           0.01   0.95    22.1912
            200        0.1     12           0.01   0.99    22.191
            200        0.1     12           0.01   0.99    22.191
            200        0.07    12           0.01   0.99    22.191
          Chemical: Thickness=[100, 100, 200, 200, 200, 200, 200, 200, 200, 200]; PH=[5.8, 5.9, 6.7, 7.05, 7.25, 7.4, 7.7, 8.1, 8.35, 8.45]; PHUnits=Water
          CERESSoilTemperature Temperature
          Solute NO3: Thickness=[100, 100, 200, 200, 200, 200, 200, 200, 200, 200]; InitialValuesUnits=ppm; WaterTableConcentration=0; D0=0; DepthConstant=0; MaxDepthSoluteAccessible=0; RunoffEffectivenessAtMovingSolute=0; MaxEffectiveRunoff=0
            InitialValues=[38.7, 15.453, 13.104, 5.544, 4.312, 3.136, 2.268, 2.394, 3.042, 4.248]
          Solute NH4: Thickness=[100, 100, 200, 200, 200, 200, 200, 200, 200, 200]; InitialValuesUnits=ppm; WaterTableConcentration=0; D0=0; DepthConstant=0; MaxDepthSoluteAccessible=0; RunoffEffectivenessAtMovingSolute=0; MaxEffectiveRunoff=0
            InitialValues=[2.25, 0.536, 0.624, 0.308, 0.246, 0.288, 0.227, 0.581, 0.507, 0.389]
          Solute Urea: Thickness=[100, 100, 200, 200, 200, 200, 200, 200, 200, 200]; InitialValues=[0, 0, 0, 0, 0, 0, 0, 0, 0, 0]; InitialValuesUnits=kg/ha; WaterTableConcentration=0; D0=0; DepthConstant=0; MaxDepthSoluteAccessible=0; RunoffEffectivenessAtMovingSolute=0; MaxEffectiveRunoff=0
          Nutrient
          Water: Thickness=[100, 100, 200, 200, 200, 200, 200, 200, 200, 200]; InitialPAWmm=216.3; RelativeTo=LL15; FilledFromTop=false
            InitialValues=[0.181, 0.204, 0.267, 0.319, 0.31, 0.283, 0.269, 0.269, 0.241, 0.241]
        Report SowingReport: EventNames=[Clock].EndOfDay
        Report SupReport: EventNames=[Clock].DoReport
          VariableNames:
            [Clock].Today
            sum([Soil].Water.MM[2:10])
        Manager SetCropParameters
  Experiment GreenethorpePhen19
    Memo
      Greenethorpe phenology trial:

      * all treatments are irrigated - "JW: For greenethorpe simulate unlimited. We tried to keep it unlimited but there would have been some stress no measure of water just applied when ever we were out there."
      * they use different TOS to the other Greenethorpe trial so will be simulated separately
      * there are only 2 TOS for the phenology trial at Greenethorpe
      * only treatments without lights used
      * phenology measurements up until the time of flowering only are recorded

      * phenological stages will change in apsim as the lentil model is developed:

      From AP: "For the moment:
      NextGen term ‘Start flowering’ – is actually 50% budding.
      NextGen term ‘End flowering’ – is actually 50% flowering.
      And I haven’t yet restructured to do a start podding."

      **Met file** - taken from SILO (same as Jeremy Whish)
    Factors
      Memo
        **Factors at Greenethorpe phenology trial**

        ***Time of sowing - only two done for the phelology trial***

        1. 18 April, 2019
        2. 21 May, 2019

        ***Cultivar - numerous but we select the following subset to work on***

        PBA Ace
        PBA Blitz
        PBA Bolt
        PBA Greenfield
        PBA Hallmark XT
        PBA Jumbo
        Nugget
        Digger - not grown at Greenethorpe
      Permutation
        Factor TOS
          CompositeFactor 1: Specifications=[Sowing].Script.SowDate = 18-Apr
          CompositeFactor 2: Specifications=[Sowing].Script.SowDate = 21-May
        Factor Cv
          Specification=[Sowing].Script.CultivarName = Ace, Blitz, Bolt, Greenfield, HallmarkXT, Jumbo2, Nugget
    Simulation GreenethorpePhen19
      Weather: FileName=ExNeil\LentilNextGen\GreenethorpeTTagTemp.met; Latitude=-34.0824; Tav=15.07; Amp=16.55
      Clock: Start=2019-04-04; End=2019-12-30
      Summary summaryfile
      SoilArbitrator Soil Arbitrator
      Zone Field: Area=1; Slope=0; AspectAngle=0; Altitude=50
        MicroClimate: a_interception=0; b_interception=1; c_interception=0; d_interception=0; SoilHeatFluxFraction=0.4; MinimumHeightDiffForNewLayer=0; NightInterceptionFraction=0.5; ReferenceHeight=1
        Irrigation
        Fertiliser
        SurfaceOrganicMatter: InitialResidueName=maize; InitialResidueType=maize; InitialResidueMass=500; InitialStandingFraction=0; InitialCPR=0; InitialCNR=65
        Report DailyReport: same as Dooen2001.DR_2001DooenWet.Field.DailyReport
        Report HarvestReport: EventNames=[Chickpea].Harvesting
          VariableNames:
            [Clock].Today
            [Lentil].Phenology.CurrentStageName as Stage
            [Lentil].Phenology.FloweringDAS as FloweringDAS
            [Lentil].Phenology.MaturityDAS as MaturityDAS
            [Lentil].Grain.Live.Wt as GrainWt
            [Lentil].AboveGround.Wt
        Manager Harvesting: same as Dooen2001.DR_2001DooenWet.Field.Harvesting
        Plant Lentil
        Manager Sowing: same as Gatton19.GattonPhen19.Field.Sowing
        Manager Automatic irrigation based on water deficit
          FASW = 0
          WaterDeficit = 0
          Crop = [Lentil]
          AutoIrrigationOn = True
          FASWThreshold = 0.9
          FASWDepth = 600
          weeks = 1
          afterSowing = 1
```csharp
using Models.Interfaces;
using System;
using Models.Core;
using System.Collections.Generic;
using System.Text;
using Models.Soils;
using Models.PMF;
using Models;
using System.Xml.Serialization;
using APSIM.Shared.Utilities;

namespace Models
{
    [Serializable] 
    public class Script : Model
    {
        [Link] private Zone zone;
        [Link] private Irrigation irrigation;
        [Link] private Soil soil;
        [Link]
        private IPhysical soilPhysical;
        [Link]
        private ISoilWater waterBalance;
        public double FASW { get; set; }
        public double WaterDeficit  { get; set; }
    

        [Description("Crop to irrigate")]
        public IPlant Crop { get; set; }
        
        [Description("Auto irrigation on?")]
        public bool AutoIrrigationOn { get; set; }

        [Description("Threshold fraction available water (0-1)")]
        public double FASWThreshold { get; set; }

        [Description("Soil depth (mm) to which fraction available water is calculated")]
        public double FASWDepth { get; set; }

        [Description("Minimum weeks between irrigations")]
        public double weeks { get; set; }

        [Description("Minimum days after sowing for first irrigation")]
        public int afterSowing { get; set; }

        private double irrigationGap = 0;    // gap between irrigations

        [EventSubscribe("DoManagement")]
        private void OnDoManagement(object sender, EventArgs e)
        {
            if (AutoIrrigationOn && Crop.IsAlive)
            {
                   irrigationGap += 1;                // increment gap between irrigations
                CalculateFASW();                // calc FASW and WaterDeficit
                if ((FASW < FASWThreshold) && (irrigationGap >= weeks * 7))
                {
                    irrigation.Apply(WaterDeficit, depth: 0);
                    irrigationGap = 0;            // reset
                }
            }
            else
            {
                irrigationGap = weeks * 7 - afterSowing - 1;    // allow irrigation a number of days after it becomes alive/sown
            }
        }

        // Calculate the fraction of the potential available sw
        // Calculate the deficit amount from DUL
        private void CalculateFASW()
        {
            double[] LL15 = MathUtilities.Multiply(soilPhysical.LL15, soilPhysical.Thickness);
            double[] DUL = MathUtilities.Multiply(soilPhysical.DUL, soilPhysical.Thickness);
        
            int nlayr = GetLayerIndex(FASWDepth);
            double cumdep = MathUtilities.Sum(soilPhysical.Thickness, 0, nlayr, 0.0);    // tricky function that sums up to before nlayr

            double part_layer = MathUtilities.Divide((FASWDepth - cumdep), soilPhysical.Thickness[nlayr], 0.0);

            // note that results may be strange if swdep < ll15
            double avail_sw = (MathUtilities.Sum(waterBalance.SWmm, 0, nlayr, 0.0) + part_layer * waterBalance.SWmm[nlayr])
                            - (MathUtilities.Sum(LL15, 0, nlayr, 0.0) + part_layer * LL15[nlayr]);

            double pot_avail_sw = (MathUtilities.Sum(DUL, 0, nlayr, 0.0) + part_layer * DUL[nlayr])
                                - (MathUtilities.Sum(LL15, 0, nlayr, 0.0) + part_layer * LL15[nlayr]);
            
            FASW = MathUtilities.Divide(avail_sw, pot_avail_sw, 0.0);
            WaterDeficit = MathUtilities.Constrain(pot_avail_sw - avail_sw, 0.0, 100000);
        }

        // Get index of the layer that has this depth in it 
        private int GetLayerIndex(double pointDepth)
        {
            double[] cumThickness = soilPhysical.ThicknessCumulative;
            int layerIdx = 0;
            while ((layerIdx < cumThickness.Length) && (pointDepth > cumThickness[layerIdx]))
            {
                layerIdx += 1;
            }

            return layerIdx;
        }
    }
}
```
        Soil: SoilType=SNSW; Site=Front paddock; NearestTown=Young; Region=Southern NSW; State=NSW; Country=Australia; Latitude=0; Longitude=0; DataSource=Kirkegaard/Lilley
          Memo: same as Greenethorpe19.Greenethorpe19.Field.soil.memo
          Physical
            Thickness  BD    AirDry  LL15   DUL    SAT
            100        1.5   0.08    0.08   0.25   0.28
            100        1.53  0.08    0.102  0.211  0.241
            200        1.56  0.1     0.156  0.232  0.262
            200        1.54  0.1     0.213  0.287  0.317
            200        1.54  0.15    0.241  0.311  0.341
            200        1.6   0.15    0.253  0.35   0.369
            200        1.62  0.15    0.258  0.35   0.369
            200        1.71  0.15    0.256  0.35   0.355
            200        1.69  0.15    0.268  0.35   0.357
            200        1.74  0.15    0.268  0.335  0.337
            200        1.7   0.15    0.268  0.335  0.344
            SoilCrop LentilSoil
              LL=[0.102, 0.102, 0.156, 0.213, 0.241, 0.253, 0.258, 0.256, 0.268, 0.268, 0.268]
              KL=[0.045, 0.045, 0.045, 0.045, 0.03, 0.02, 0.02, 0.02, 0.02, 0.01, 0.01]
              XF=[1, 1, 1, 1, 1, 1, 0, 0, 0, 0, 0]
              LL source: Field measured and checked for sensibility
          WaterBalance SoilWater: SummerDate=1-Nov; SummerU=6; SummerCona=3.5; WinterDate=1-Apr; WinterU=4; WinterCona=2.5; DiffusConst=40; DiffusSlope=16; Salb=0.12; CN2Bare=73; CNRed=20; CNCov=0.8; PSIDul=-100; Thickness=[100, 100, 200, 200, 200, 200, 200, 200, 200, 200, 200]; SWCON=[0.3, 0.3, 0.3, 0.3, 0.3, 0.3, 0.3, 0.3, 0.3, 0.3, 0.3]
          Organic: FOMCNRatio=40; CarbonUnits=Total
            Thickness  Carbon  SoilCNRatio  FBiom  FInert  FOM
            100        1       12           0.06   0.01    347.129
            100        0.35    12           0.05   0.01    270.344
            200        0.22    12           0.035  0.35    163.972
            200        0.22    12           0.015  0.425   99.4541
            200        0.18    12           0.01   0.55    60.322
            200        0.135   12           0.01   0.75    36.5871
            200        0.105   12           0.01   0.95    22.1912
            200        0.1     12           0.01   0.99    22.191
            200        0.1     12           0.01   0.99    22.191
            200        0.07    12           0.01   0.99    22.191
            200        0.045   12           0.01   0.99    22.191
          Chemical: Thickness=[100, 100, 200, 200, 200, 200, 200, 200, 200, 200, 200]; PH=[5.8, 5.9, 6.7, 7.05, 7.25, 7.4, 7.7, 8.1, 8.35, 8.45, 8.5]; PHUnits=Water
          CERESSoilTemperature Temperature
          Water: Thickness=[100, 100, 200, 200, 200, 200, 200, 200, 200, 200, 200]; InitialPAWmm=171.7; RelativeTo=LL15; FilledFromTop=false
            InitialValues=[0.25, 0.211, 0.232, 0.287, 0.311, 0.35, 0.35, 0.35, 0.35, 0.335, 0.335]
          Solute NO3: Thickness=[100, 100, 200, 200, 200, 200, 200, 200, 200, 200, 200]; InitialValuesUnits=ppm; WaterTableConcentration=0; D0=0; DepthConstant=0; MaxDepthSoluteAccessible=0; RunoffEffectivenessAtMovingSolute=0; MaxEffectiveRunoff=0
            InitialValues=[38.7, 15.453, 13.104, 5.544, 4.312, 3.136, 2.268, 2.394, 3.042, 4.248, 5.1]
          Solute NH4: Thickness=[100, 100, 200, 200, 200, 200, 200, 200, 200, 200, 200]; InitialValuesUnits=ppm; WaterTableConcentration=0; D0=0; DepthConstant=0; MaxDepthSoluteAccessible=0; RunoffEffectivenessAtMovingSolute=0; MaxEffectiveRunoff=0
            InitialValues=[2.25, 0.536, 0.624, 0.308, 0.246, 0.288, 0.227, 0.581, 0.507, 0.389, 0.272]
          Solute Urea: Thickness=[100, 100, 200, 200, 200, 200, 200, 200, 200, 200, 200]; InitialValues=[0, 0, 0, 0, 0, 0, 0, 0, 0, 0, 0]; InitialValuesUnits=kg/ha; WaterTableConcentration=0; D0=0; DepthConstant=0; MaxDepthSoluteAccessible=0; RunoffEffectivenessAtMovingSolute=0; MaxEffectiveRunoff=0
          Nutrient
        Report SowingReport: EventNames=[Clock].EndOfDay
        Manager SetCropParameters
  Experiment Mildura19
    Factors
      Memo
        **Factors at Emerald**

        ***Time of sowing***

        1. 1 May, 2019
        2. 18 May, 2019
        3. 7 June, 2019

        ***Cultivar***

        PBA Jumbo 2
        PBA Blitz
        PBA Ace
        PBA Hallmark XT
        PBA Greenfield
      Permutation
        Factor TOS
          CompositeFactor 1
            Specifications:
              [Sowing].Script.SowDate = 1-May
              [Reset on date]
              [Irrigate on fixed dates]
              [Water].Thickness=100,200,300,300,300,300,300
              [Water].InitialValues=0.105,0.149,0.225,0.257,0.255,0.255,0.255
            Manager Reset on date
              ResetDate = 18-May
              ResetWater = Yes
              ResetSOM = No
              script: same as in Caragabal19.Caragabal19.Field.Reset on date
            Manager Irrigate on fixed dates
              IrrigateDates = 2-May
              Amount = 20
              Depth = 0
              Efficiency = 1
              WillRunoff = False
              script: same as in Dooen2001.Factors.Permutation.Irr.Wet.Irrigate on fixed dates
          CompositeFactor 2
            Specifications:
              [Sowing].Script.SowDate = 18-May
              [Reset on date]
              [Irrigate on fixed dates]
              [Water].Thickness=100,200,300,300,300,300,300
              [Water].InitialValues=0.105,0.149,0.225,0.257,0.255,0.255,0.255
            Manager Reset on date: same as Mildura19.Factors.Permutation.TOS.1.Reset on date
            Manager Irrigate on fixed dates
              IrrigateDates = 19-may
              Amount = 20
              Depth = 0
              Efficiency = 1
              WillRunoff = False
              script: same as in Dooen2001.Factors.Permutation.Irr.Wet.Irrigate on fixed dates
          CompositeFactor 3
            Specifications:
              [Sowing].Script.SowDate = 7-Jun
              [Reset on date]
              [Irrigate on fixed dates]
              [Water].Thickness=100,200,300,300,300,300,300
              [Water].InitialValues=0.105,0.149,0.225,0.257,0.255,0.255,0.255
            Manager Reset on date: same as Mildura19.Factors.Permutation.TOS.1.Reset on date
            Manager Irrigate on fixed dates
              IrrigateDates = 8-jun
              Amount = 20
              Depth = 0
              Efficiency = 1
              WillRunoff = False
              script: same as in Dooen2001.Factors.Permutation.Irr.Wet.Irrigate on fixed dates
        Factor Cv
          Specification=[Sowing].Script.CultivarName = Bolt, Ace, Blitz, Greenfield, HallmarkXT, Jumbo2
    Simulation Mildura19
      Weather: FileName=ExNeil\LentilNextGen\MildurahPO.met; Latitude=-34.1833; Tav=17.46; Amp=15.71
      Clock: Start=2019-05-01; End=2019-12-31
      Summary summaryfile
      SoilArbitrator Soil Arbitrator
      Zone Field: Area=1; Slope=0; AspectAngle=0; Altitude=50
        MicroClimate: a_interception=0; b_interception=1; c_interception=0; d_interception=0; SoilHeatFluxFraction=0.4; MinimumHeightDiffForNewLayer=0; NightInterceptionFraction=0.5; ReferenceHeight=1
        Irrigation
        Fertiliser
        SurfaceOrganicMatter: InitialResidueName=maize; InitialResidueType=maize; InitialResidueMass=500; InitialStandingFraction=0; InitialCPR=0; InitialCNR=65
        Report DailyReport: same as Dooen2001.DR_2001DooenWet.Field.DailyReport
        Report HarvestReport: EventNames=[Chickpea].Harvesting
          VariableNames:
            [Clock].Today
            [Lentil].Phenology.CurrentStageName as Stage
            [Lentil].Phenology.FloweringDAS as FloweringDAS
            [Lentil].Phenology.MaturityDAS as MaturityDAS
            [Lentil].Grain.Live.Wt as GrainWt
            [Lentil].AboveGround.Wt
            [Lentil].Structure.BranchNumber
        Manager Harvesting: same as Dooen2001.DR_2001DooenWet.Field.Harvesting
        Plant Lentil
        Manager Sowing
          SowDate = 25-Apr
          CultivarName = Jumbo2
          SowingDepth = 50
          RowSpacing = 250
          Population = 110
          script: same as in Dooen2001.DR_2001DooenWet.Field.Sowing
        Manager Reset on date: same as Emerald19.Factors.Permutation.TOS.1.Reset on date
        Soil: ASCOrder=Calcarosol; SoilType=Sandy loam; Site=Kerribee; NearestTown=Paringi; Region=Lower Western; State=New South Wales; Country=Australia; NaturalVegetation=Belah and mallee; ApsoilNumber=359; Latitude=-34.288; Longitude=142.371; LocationAccuracy=+/- 20m
          DataSource=Based on Soil Characterisation undertaken by Whitbread/Davoren GRDC Soil water project and Jeff Baldock MSF data
          Physical
            Thickness  ParticleSizeClay  BD     AirDry  LL15   DUL    SAT    KS
            100        10.6              1.286  0.016   0.038  0.13   0.16   0
            200        15.2              1.486  0.048   0.07   0.18   0.39   0
            300        17.7              1.471  0.07    0.126  0.21   0.396  0
            300        21.9              1.59   0.1     0.168  0.217  0.39   0
            300        21.2              1.59   0.11    0.183  0.196  0.32   0
            300        22.1              1.626  0.11    0.19   0.19   0.32   0
            300        22.1              1.626  0.11    0.19   0.19   0.32   0
            SoilCrop LentilSoil: LL=[0.044, 0.081, 0.135, 0.184, 0.194, 0.19, 0.19]; KL=[0.045, 0.045, 0.045, 0.03, 0.025, 0.02, 0.01]; XF=[1, 1, 1, 1, 1, 1, 0]
            SoilCrop ChickpeaSoil: LL=[0.044, 0.081, 0.135, 0.184, 0.194, 0.19, 0.19]; KL=[0.06, 0.06, 0.06, 0.06, 0.04, 0.04, 0.04]; XF=[1, 1, 1, 1, 1, 1, 0]
          WaterBalance SoilWater: SummerDate=1-Nov; SummerU=4; SummerCona=2; WinterDate=1-Apr; WinterU=4; WinterCona=2; DiffusConst=88; DiffusSlope=35; Salb=0.13; CN2Bare=70; CNRed=20; CNCov=0.8; PSIDul=-100; Thickness=[100, 100, 200, 200, 200, 200, 200, 300]; SWCON=[0.7, 0.7, 0.7, 0.7, 0.7, 0.7, 0.5, 0.5]
          Organic: FOMCNRatio=40; CarbonUnits=Total
            Thickness  Carbon    SoilCNRatio  FBiom  FInert    FOM
            100        0.47      13.8         0.04   0.5       301.302
            200        0.325     13.8         0.02   0.7       206.0215
            300        0.246667  13.8         0.02   0.933333  129.015
            300        0.213333  13.8         0.01   1         66.135
            300        0.2       13.8         0.01   1         38.8583
            300        0.2       13.8         0.01   1         18.322
            300        0.2       13.8         0.01   1         18.322
          Chemical: Thickness=[100, 200, 300, 300, 300, 300, 300]; PH=[7.1, 7.95, 8.16667, 8.43333, 8.5, 8.5, 8.5]; PHUnits=Water
          CERESSoilTemperature Temperature
          Water: Thickness=[100, 200, 300, 300, 300, 300, 300]; InitialValues=[0.105, 0.149, 0.225, 0.257, 0.255, 0.255, 0.255]; InitialPAWmm=139.5; RelativeTo=LL15; FilledFromTop=false
          Solute NO3: InitialValuesUnits=ppm; WaterTableConcentration=0; D0=0; DepthConstant=0; MaxDepthSoluteAccessible=0; RunoffEffectivenessAtMovingSolute=0; MaxEffectiveRunoff=0
          Solute NH4: InitialValuesUnits=ppm; WaterTableConcentration=0; D0=0; DepthConstant=0; MaxDepthSoluteAccessible=0; RunoffEffectivenessAtMovingSolute=0; MaxEffectiveRunoff=0
          Solute Urea: Thickness=[100, 200, 300, 300, 300, 300, 300]; InitialValues=[0, 0, 0, 0, 0, 0, 0]; InitialValuesUnits=kg/ha; WaterTableConcentration=0; D0=0; DepthConstant=0; MaxDepthSoluteAccessible=0; RunoffEffectivenessAtMovingSolute=0; MaxEffectiveRunoff=0
          Nutrient
        Manager Irrigate on fixed dates
          IrrigateDates = 10-aug, 22-sep
          Amount = 45
          Depth = 0
          Efficiency = 1
          WillRunoff = False
          script: same as in Dooen2001.Factors.Permutation.Irr.Wet.Irrigate on fixed dates
        Report SowingReport: EventNames=[Clock].EndOfDay
        Manager SetCropParameters
  Experiment Millmerran19
    Memo
      More soil information needed -

      **Initial SW:**

      Brook - when you get a minute could you pls send Elizabeth the starting soil water data from Millmerran (Tosari)?

      **--> need BD from apsim to convert to vol WC**

      **Soil type:**

      Elizabeth – it will probably be Typvert 2 or 3, not sure which. We don’t have final SW out there either. Will help make the choice tomorrow
    Factors
      Memo
        **Factors at Walgett for lentils**

        ***Time of sowing***

        1. 15 June, 2019
        2. 2 July, 2019
        3. 15 July, 2019

        ***Cultivar***

        Ace
        Blitz
        Greenfield
        HallmarkXT
        Jumbo2
      Permutation
        Factor TOS
          CompositeFactor 1: Specifications=[Sowing].Script.SowDate = 15-Jun
          CompositeFactor 2: Specifications=[Sowing].Script.SowDate = 2-Jul
          CompositeFactor 3: Specifications=[Sowing].Script.SowDate = 15-Jul
        Factor Cv
          Specification=[Sowing].Script.CultivarName = Ace,Blitz,Greenfield,HallmarkXT,Jumbo2
    Simulation Millmerran19
      Weather: FileName=ExNeil\LentilNextGen\MillmerranPO.met; Latitude=-27.8742; Tav=18.59; Amp=14.52
      Clock: Start=2019-06-01; End=2019-12-31
      Summary summaryfile
      SoilArbitrator Soil Arbitrator
      Zone Field: Area=1; Slope=0; AspectAngle=0; Altitude=50
        MicroClimate: a_interception=0; b_interception=1; c_interception=0; d_interception=0; SoilHeatFluxFraction=0.4; MinimumHeightDiffForNewLayer=0; NightInterceptionFraction=0.5; ReferenceHeight=1
        Irrigation
        Fertiliser
        SurfaceOrganicMatter: InitialResidueName=maize; InitialResidueType=maize; InitialResidueMass=500; InitialStandingFraction=0; InitialCPR=0; InitialCNR=65
        Report DailyReport: same as Dooen2001.DR_2001DooenWet.Field.DailyReport
        Report HarvestReport: same as Mildura19.Mildura19.Field.HarvestReport
        Manager Harvesting: same as Dooen2001.DR_2001DooenWet.Field.Harvesting
        Plant Lentil
        Manager Sowing
          SowDate = 25-Apr
          CultivarName = Jumbo2
          SowingDepth = 50
          RowSpacing = 300
          Population = 52
          script: same as in Dooen2001.DR_2001DooenWet.Field.Sowing
        Manager Reset on date
          ResetDate = 19-May
          ResetWater = Yes
          ResetSOM = No
          script: same as in Caragabal19.Caragabal19.Field.Reset on date
        Manager Irrigate on fixed dates
          IrrigateDates = 13-may,4-jul,13-aug
          Amount = 30
          Depth = 0
          Efficiency = 1
          WillRunoff = False
          script: same as in Dooen2001.Factors.Permutation.Irr.Wet.Irrigate on fixed dates
        Soil: ASCOrder=Vertosol; SoilType=Clay; Site=Generic-Qld; State=Generic; Country=Australia; NaturalVegetation=NA; ApsoilNumber=523-GENERIC; Latitude=-27.183286; Longitude=151.263748; LocationAccuracy=Regional Soil Type; DataSource=Generic soil. CSIRO Sustainable Ecosystems, Toowoomba
          Comments=Generic soil developed by Allan Peake. 'Typical Vertosol' soil properties have been calculated as the average of vertosols with similar characteristics from within the Apsoil database. Groupings were made on the basis of bulk density. Measured BD, DUL and CLL for the groups were then averaged to derive the characteristics of the typical Vertosols. They can then be used in conjunction with measured soil water to simplify the selection of appropriate Vertosols, for paddocks where full soil characterisations have not yet been completed. For more information see Peake et al. 2010: ‘A rapid method for estimating the plant available water capacity of Vertosols’, 2010 Australian Agronomy Conference. Typical Vertosols are different to 'Generic' soil types elsewhere in the Apsoil database, which are representative of certain soil types and districts, but have not been calculated from large numbers of similar, characterised soils.
          Memo
            This soil is AP's TypVert 11 "Vertosol No11 (PAWC-136 No523-Generic)".
          Physical
            Thickness  ParticleSizeSand  ParticleSizeSilt  ParticleSizeClay  Rocks  BD    AirDry  LL15   DUL    SAT
            150        5                 65                30                0      1.59  0.089   0.177  0.32   0.37
            150        5                 65                30                0      1.62  0.14    0.175  0.308  0.358
            300        5                 65                30                0      1.59  0.16    0.19   0.321  0.371
            300        5                 65                30                0      1.58  0.19    0.19   0.322  0.372
            300        5                 65                30                0      1.61  0.19    0.19   0.312  0.362
            300        5                 65                30                0      1.64  0.19    0.19   0.301  0.351
            300        5                 65                30                0      1.7   0.19    0.19   0.28   0.329
            Rocks, ParticleSizeSand, ParticleSizeSilt, ParticleSizeClay source: Calculated
            SoilCrop ChickpeaSoil: LL=[0.16, 0.161, 0.16, 0.191, 0.199, 0.28, 0.28]; KL=[0.033, 0.033, 0.033, 0.022, 0.018, 0.015, 0.075]; XF=[1, 1, 1, 1, 1, 1, 1]
              LL source: Field measured and checked for sensibility
            SoilCrop LentilSoil
              LL=[0.119912, 0.195459, 0.192306, 0.194867, 0.201156, 0.28, 0.28]
              KL=[0.033, 0.033, 0.033, 0.022, 0.018, 0.015, 0.075]
              XF=[1, 1, 1, 1, 1, 1, 1]
              LL source: Field measured and checked for sensibility
            SoilCrop WheatSoil: LL=[0.177, 0.175, 0.19, 0.22, 0.251, 0.278, 0.28]; KL=[0.06, 0.06, 0.06, 0.04, 0.04, 0.02, 0.02]; XF=[1, 1, 1, 1, 1, 1, 1]
              LL source: Field measured and checked for sensibility
          WaterBalance SoilWater: SummerDate=1-Nov; SummerU=2; SummerCona=4.5; WinterDate=1-Apr; WinterU=2; WinterCona=4; DiffusConst=88; DiffusSlope=35; Salb=0.13; CN2Bare=73; CNRed=20; CNCov=0.8; PSIDul=-100; Thickness=[150, 150, 300, 300, 300, 300, 300]; SWCON=[0.3, 0.3, 0.3, 0.3, 0.3, 0.3, 0.3]
          Organic: FOMCNRatio=40; CarbonUnits=Total
            Thickness  Carbon  SoilCNRatio  FBiom  FInert  FOM
            150        1.17    12           0.04   0.4     347.129
            150        0.936   12           0.02   0.6     270.344
            300        0.585   12           0.02   0.8     163.972
            300        0.2925  12           0.02   1       99.4541
            300        0.1755  12           0.01   1       60.322
            300        0.117   12           0.01   1       36.5871
            300        0.117   12           0.01   1       22.1912
          Chemical: Thickness=[150, 150, 300, 300, 300, 300, 300]; PH=[8.1, 8.7, 8.9, 8, 7, 6.4, 5.8]; PHUnits=Water
          Water: Thickness=[150, 150, 300, 300, 300, 300, 300]; InitialPAWmm=183.578; RelativeTo=LL15; FilledFromTop=false
            InitialValues=[0.19875, 0.281556, 0.304008, 0.303202, 0.296562, 0.297, 0.297]
          CERESSoilTemperature Temperature
          Solute NO3: Thickness=[150, 150, 300, 300, 300, 300, 300]; InitialValues=[10, 5, 3, 1, 1, 1, 1]; InitialValuesUnits=ppm; WaterTableConcentration=0; D0=0; DepthConstant=0; MaxDepthSoluteAccessible=0; RunoffEffectivenessAtMovingSolute=0; MaxEffectiveRunoff=0
          Solute NH4: Thickness=[150, 150, 300, 300, 300, 300, 300]; InitialValues=[3, 1, 1, 1, 1, 1, 1]; InitialValuesUnits=ppm; WaterTableConcentration=0; D0=0; DepthConstant=0; MaxDepthSoluteAccessible=0; RunoffEffectivenessAtMovingSolute=0; MaxEffectiveRunoff=0
          Solute Urea: same as ControlledEnvironment.Roberts1988.ReadingCE.Field.Soil.Urea
          Nutrient
        Report SowingReport: EventNames=[Clock].EndOfDay
        Manager SetCropParameters
  Experiment Roseworthy
    Memo
      Reference: Lake, Lachlan, and Victor O. Sadras. ‘Lentil Yield and Crop Growth Rate Are Coupled under Stress but Uncoupled under Favourable Conditions’. European Journal of Agronomy 126 (1 May 2021): 126266. https://doi.org/10.1016/j.eja.2021.126266.

      Pant material, environments and experimental design:

      We established a factorial experiment with 20 lentil lines varying in seed type and phenology.

      Crops were grown in eight environments that resulted from the combinationof two seasons (2018, 2019), two sowing dates and two water regimes. Early sowings were on the 24th of April 2018 and the 29th April 2019, and the late sowings on the 6th of June 2018 and 24th of June 2019. Early-sown crops were irrigated or rainfed. Rainout shelters were set on earlysown crops to exclude rainfall from 26th June 2018 to harvest and from 1st August 2019 to harvest. Late-sown crops were irrigated or rainfed.

      Each experimental plot comprised six rows, 0.23m apart, 5m long, with target plant density 120 plants/m2.

      Crops were sown after barley on calcic luvisol soil at Roseworthy (34.35, 138.69), South Australia. At sowing, we added 80kg/h amonoammonium phosphate.

      Daily weather data were obtained from the Roseworthy weather station of the Australian Bureau of Meteorology.
    Factors
      Permutation
        Factor TOSbyIrr
          CompositeFactor 24Apr2018Irrigated
            Specifications:
              [Clock].StartDate = 1-Apr-2018
              [Clock].EndDate = 1-Jan-2019
              [Sowing].Script.SowDate=24-Apr
              [IrrigationApplications]
            Operations IrrigationApplications
              2018-04-26  [Irrigation].Apply(amount:30);
              2018-05-18  [Irrigation].Apply(amount:18);
              2018-07-04  [Irrigation].Apply(amount:11);
          CompositeFactor 24Apr2018Rainout
            Specifications:
              [Clock].StartDate = 1-Apr-2018
              [Clock].EndDate = 1-Jan-2019
              [Sowing].Script.SowDate=24-Apr
              [ClimateController]
            Manager ClimateController
              AllowControl = True
              EnableDate = 06/26/2018 00:00:00
              WithinYearControl = False
              ControlStart =
              ControlEnd =
              RainfallMultiplier = 0
              RainfallAddition = 0
              RadiationMultiplier = 1
              RadiationAddition = 0
              MinTMultiplier = 1
              MinTAddition = 0
              MaxTMultiplier = 1
              MaxTAddition = 0
              WindMultiplier = 1
              WindAddition = 0
              VPMultiplier = 1
              VPAddition = 0
```csharp
using Newtonsoft.Json;
using APSIM.Shared.Utilities;
using Models.Interfaces;
using Models.Soils;
using Models.PMF;
using Models.Core;
using System.Xml.Serialization;
using System;
using System.Linq;
using Models.Soils.Nutrients;
using Models.Climate;

namespace Models
{
    [Serializable]
    public class Script : Model
    {
        // - Links to APSIM models
        [Link] Zone zone;
        [Link] Clock clock;
        [Link] Weather weather;
        [Link] ISummary summary = null;

        // - Paramters for this manager
        [Description("Enable? Set to 'No' to completely disable this manager")] public bool AllowControl { get; set; }

        [Separator("General settings")]
        [Description("Start the climate controls beginning on date (dd/mmm/yyyy): ")] public DateTime EnableDate { get; set; }
        [Description("Implement climate control only during part of the year?")] public bool WithinYearControl { get; set; }
        [Description("Within each year, the first day to start the climate controls is (dd-mmm)")] public string ControlStart { get; set; }
        [Description("Within each year, end last day of climate control is (dd-mmm)")] public string ControlEnd { get; set; }

        [Separator("Rainfall")]
        [Description("Rainfall multiplier (-): ")] public double RainfallMultiplier { get; set; }
        [Description("Rainfall addition (mm): ")] public double RainfallAddition { get; set; }

        [Separator("Radiation")]
        [Description("Radiation multiplier (-): ")] public double RadiationMultiplier { get; set; }
        [Description("Radiation addition (MJ/m2): ")] public double RadiationAddition { get; set; }

        [Separator("Minimum temperature")]
        [Description("Minimum temperature multiplier (-): ")] public double MinTMultiplier { get; set; }
        [Description("Minimum temperature addition (C): ")] public double MinTAddition { get; set; }

        [Separator("Maximum temperature")]
        [Description("Maximum temperature multiplier (-): ")] public double MaxTMultiplier { get; set; }
        [Description("Maximum temperature addition (C): ")] public double MaxTAddition { get; set; }

        [Separator("Wind speed")]
        [Description("Wind speed multiplier (-): ")] public double WindMultiplier { get; set; }
        [Description("Wind speed addition (m/s): ")] public double WindAddition { get; set; }

        [Separator("Vapour pressure")]
        [Description("Vapour pressure multiplier (-): ")] public double VPMultiplier { get; set; }
        [Description("Vapour pressure addition (hPa): ")] public double VPAddition { get; set; }

        [JsonIgnore] public bool DoControl { get; set; }
        [JsonIgnore] public int DoControlInt { get; set; }

        [EventSubscribe("PreparingNewWeatherData")] private void OnDoManagement(object sender, EventArgs e)
        {
            // Check if this manager is enabled
            if ((AllowControl) && (clock.Today >= EnableDate))
            {
                DoControl = true;
                if (WithinYearControl)
                    DoControl = DateUtilities.WithinDates(ControlStart, clock.Today, ControlEnd); 
            }

            if (DoControl)
                DoControlInt = 1;
            else
                DoControlInt = 0;

            if (DoControl)
            {
                // do the weather alterations 
                weather.Rain = RainfallMultiplier * weather.Rain + RainfallAddition;
                weather.Radn = RadiationMultiplier * weather.Radn + RadiationAddition;
                weather.MinT = MinTMultiplier * weather.MinT + MinTAddition;
                weather.MaxT = MaxTMultiplier * weather.MaxT + MaxTAddition;
                weather.Wind = WindMultiplier * weather.Wind + WindAddition;
                weather.VP = VPMultiplier * weather.VP + VPAddition;
            }
        }
    }
}
```
          CompositeFactor 6Jun2018Irrigated
            Specifications:
              [Clock].StartDate = 1-Apr-2018
              [Clock].EndDate = 1-Jan-2019
              [Sowing].Script.SowDate=6-Jun
              [IrrigationApplications]
            Operations IrrigationApplications
              2018-07-04  [Irrigation].Apply(amount:12);
              2018-09-02  [Irrigation].Apply(amount:12);
              2018-09-26  [Irrigation].Apply(amount:24.4);
          CompositeFactor 6Jun2018Rainfed
            Specifications:
              [Clock].StartDate = 1-Apr-2018
              [Clock].EndDate = 1-Jan-2019
              [Sowing].Script.SowDate=6-Jun
          CompositeFactor 29Apr2019Irrigated
            Specifications:
              [Sowing].Script.SowDate=24-Apr
              [IrrigationApplications]
              [Clock].StartDate = 1-Apr-2019
              [Clock].EndDate = 1-Jan-2020
            Operations IrrigationApplications
              2019-08-29  [Irrigation].Apply(amount:22);
              2019-09-12  [Irrigation].Apply(amount:15);
              2019-10-04  [Irrigation].Apply(amount:22);
              2019-10-21  [Irrigation].Apply(amount:22);
          CompositeFactor 29Apr2019Rainout
            Specifications:
              [Sowing].Script.SowDate=24-Apr
              [ClimateController]
              [Clock].StartDate = 1-Apr-2019
              [Clock].EndDate = 1-Jan-2020
            Manager ClimateController
              AllowControl = True
              EnableDate = 08/01/2019 00:00:00
              WithinYearControl = False
              ControlStart =
              ControlEnd =
              RainfallMultiplier = 0
              RainfallAddition = 0
              RadiationMultiplier = 1
              RadiationAddition = 0
              MinTMultiplier = 1
              MinTAddition = 0
              MaxTMultiplier = 1
              MaxTAddition = 0
              WindMultiplier = 1
              WindAddition = 0
              VPMultiplier = 1
              VPAddition = 0
              script: same as in Roseworthy.Factors.Permutation.TOSbyIrr.24Apr2018Rainout.ClimateController
          CompositeFactor 24Jun2019Irrigated
            Specifications:
              [Sowing].Script.SowDate=24-Jun
              [IrrigationApplications]
              [Clock].StartDate = 1-Apr-2019
              [Clock].EndDate = 1-Jan-2020
            Operations IrrigationApplications
              2019-08-29  [Irrigation].Apply(amount:22);
              2019-09-15  [Irrigation].Apply(amount:40);
              2019-10-04  [Irrigation].Apply(amount:22);
              2019-10-21  [Irrigation].Apply(amount:22);
          CompositeFactor 24Jun2019Rainfed
            Specifications:
              [Sowing].Script.SowDate=24-Jun
              [Clock].StartDate = 1-Apr-2019
              [Clock].EndDate = 1-Jan-2020
        Factor Cv
          Specification=[Sowing].Script.CultivarName=Ace,Aldinga,Blitz,Bolt,Boomer,CIPAL0901,CIPAL1504,CIPAL1701,Commando,Flash,Giant,Greenfield,Hurricane,Indianhead,Jumbo,Jumbo2,Matilda,Nipper,Northfield,Nugget
    Simulation Roseworthy2018
      Memo
        Early sowing in 2018 with irrigation. Sown at 24th of April 2018.
        The amount and date of irrigation are merged to rainfall in the weather data.
      Weather: FileName=Met\Roseworthy.met; Latitude=-34.5267; Tav=16.58; Amp=13.43
      Clock: Start=2018-04-24; End=2020-11-30
      Summary summaryfile
      SoilArbitrator Soil Arbitrator
      Zone Field: Area=1; Slope=0; AspectAngle=0; Altitude=50
        Manager Sowing
          Crop = [Lentil]
          SowDate =
          CultivarName =
          SowingDepth = 50
          RowSpacing = 230
          Population = 120
```csharp
using APSIM.Shared.Utilities;
using Models.Utilities;
using Models.Soils;
using Models.PMF;
using Models.Core;
using System;
using System.Linq;
using System.Diagnostics;

namespace Models
{
    [Serializable]
    public class Script : Model
    {
        [Link] Clock Clock;
        [Link] Fertiliser Fertiliser;
        [Link] Summary Summary;
        [Link] Soil Soil;
        
        [Description("Crop")]
        public IPlant Crop { get; set; }

        [Description("Sowing date (d-mmm)")]
        public string SowDate { get; set; }

        [Display(Type = DisplayType.CultivarName)]
        [Description("Cultivar to be sown")]
        public string CultivarName { get; set; }

        [Description("Sowing depth (mm)")]
        public double SowingDepth { get; set; }

        [Description("Row spacing (mm)")]
        public double RowSpacing { get; set; }

        [Description("Plant population (/m2)")]
        public double Population { get; set; }

        [EventSubscribe("DoManagement")]
        private void OnDoManagement(object sender, EventArgs e)
        {
            if (DateUtilities.WithinDates(SowDate, Clock.Today, SowDate))
            {
                Crop.Sow(population: Population, cultivar: CultivarName, depth: SowingDepth, rowSpacing: RowSpacing);    
            }
        }
    }
}
```
        Plant Lentil
        Soil: Latitude=0; Longitude=0
          Water: Thickness=[150, 150, 150, 150, 150, 150, 300, 300, 300]; InitialPAWmm=193.05; RelativeTo=LL15; FilledFromTop=false
            InitialValues=[0.304, 0.31, 0.31, 0.324, 0.328, 0.328, 0.325, 0.337, 0.35]
          Physical
            Thickness  ParticleSizeSand  ParticleSizeSilt  ParticleSizeClay  Rocks     BD    AirDry  LL15   DUL    SAT
            150        5                 65                30                0.176532  1.56  0.053   0.19   0.304  0.315
            150        5                 65                30                0.167856  1.52  0.08    0.21   0.31   0.33
            150        5                 65                30                0.193051  1.46  0.21    0.21   0.31   0.337
            150        5                 65                30                0.185868  1.46  0.223   0.223  0.324  0.34
            150        5                 65                30                0.212344  1.42  0.219   0.219  0.328  0.34
            150        5                 65                30                0.210027  1.42  0.219   0.219  0.328  0.341
            300        5                 65                30                0.17629   1.46  0.219   0.219  0.325  0.344
            300        5                 65                30                0.142683  1.5   0.229   0.229  0.337  0.346
            300        5                 65                30                0         1.53  0.237   0.237  0.35   0.37
            Rocks, ParticleSizeSand, ParticleSizeSilt, ParticleSizeClay source: Calculated
            SoilCrop LentilSoil
              LL=[0.19, 0.21, 0.21, 0.235, 0.233, 0.242, 0.248, 0.277, 0.285]
              KL=[0.08, 0.08, 0.08, 0.08, 0.06, 0.09, 0.06, 0.05, 0.03]
              XF=[1, 1, 1, 1, 1, 1, 1, 1, 1]
          WaterBalance SoilWater: SummerDate=1-Nov; SummerU=1.5; SummerCona=6.6; WinterDate=1-Apr; WinterU=1.5; WinterCona=6.6; DiffusConst=88; DiffusSlope=35; Salb=0.2; CN2Bare=85; CNRed=20; CNCov=0.8; DischargeWidth=5; CatchmentArea=10; PSIDul=-100; Thickness=[100, 100, 300, 300, 400, 600]; SWCON=[0.5, 0.5, 0.5, 0.5, 0.5, 0.5]
          Organic: FOMCNRatio=33; CarbonUnits=Total
            Thickness  Carbon  SoilCNRatio  FBiom  FInert  FOM
            150        1.27    14.5         0.05   0.39    0
            150        0.59    14.5         0.02   0.47    0
            150        0.34    14.5         0.015  0.52    0
            150        0.34    14.5         0.01   0.62    0
            150        0.26    14.5         0.01   0.74    0
            150        0.26    14.5         0.01   0.83    0
            300        0.25    14.5         0.01   0.93    0
            300        0.19    14.5         0.01   0.93    0
            300        0.21    14.5         0.01   0.93    0
          Chemical: Thickness=[100, 100, 300, 300, 400, 600]; PH=[6.5, 6.6, 7, 7, 6.5, 6.1]; PHUnits=Water
          CERESSoilTemperature Temperature
          Nutrient
          Solute NO3: Thickness=[100, 100, 300, 300, 400, 600]; InitialValues=[2, 2, 2, 2, 2, 2]; InitialValuesUnits=ppm; WaterTableConcentration=0; D0=0; DepthConstant=0; MaxDepthSoluteAccessible=0; RunoffEffectivenessAtMovingSolute=0; MaxEffectiveRunoff=0
          Solute NH4: Thickness=[100, 100, 300, 300, 400, 600]; InitialValues=[1, 1, 1, 1, 1, 1]; InitialValuesUnits=ppm; WaterTableConcentration=0; D0=0; DepthConstant=0; MaxDepthSoluteAccessible=0; RunoffEffectivenessAtMovingSolute=0; MaxEffectiveRunoff=0
          Solute Urea: Thickness=[100, 100, 300, 300, 400, 600]; InitialValues=[0, 0, 0, 0, 0, 0]; InitialValuesUnits=kg/ha; WaterTableConcentration=0; D0=0; DepthConstant=0; MaxDepthSoluteAccessible=0; RunoffEffectivenessAtMovingSolute=0; MaxEffectiveRunoff=0
        MicroClimate: a_interception=0; b_interception=1; c_interception=0; d_interception=0; SoilHeatFluxFraction=0.4; MinimumHeightDiffForNewLayer=0; NightInterceptionFraction=0.5; ReferenceHeight=1
        Irrigation
        Fertiliser
        SurfaceOrganicMatter: InitialResidueName=maize; InitialResidueType=maize; InitialResidueMass=500; InitialStandingFraction=0; InitialCPR=0; InitialCNR=65
        Manager Harvesting
```csharp
using Models.PMF.Phen;
using System;
using Models.Core;
using System.Collections.Generic;
using System.Text;
using Models.Soils;
using Models.PMF;
using Models;
using System.Xml.Serialization;
using APSIM.Shared.Utilities;
using Newtonsoft.Json;

namespace Models
{
    [Serializable] 
    public class Script : Model
    {      
        [Link] private Plant Lentil;
        [Link] private Zone zone;
        [Link(Type = LinkType.Path, Path = "[Lentil].Phenology")]
        private Phenology phenology;
        [Link] private Simulation sim;
        [Link] private Clock Clock;
        [JsonIgnore] public bool Harvested { get; set; }
        [JsonIgnore] public bool EndSet { get; set; }
        
        [EventSubscribe("StartOfSimulation")]
        private void OnSimulationCommencing(object sender, EventArgs e)
        {
        	Harvested = false;
            EndSet = false;
        }       
        
        [EventSubscribe("DoManagement")]
        private void OnDoManagement(object sender, EventArgs e)
        {
        	if (phenology.CurrentPhase.Name=="ReadyForHarvesting")
           {
		       Lentil.Harvest();
		       //Lentil.EndCrop();
		       Harvested = true;
           }
           
		   if ((Harvested == true) && (EndSet == false))
		   {
		       //sim.Set("Clock.EndDate", Clock.Today.AddDays(1));
		       EndSet = true;
		   }
        }
        
    }
}
```
        Report HarvestReport: EventNames=[Lentil].Harvesting
          VariableNames:
            [Clock].Today as Date
            [Sowing].Script.CultivarName
            [Sowing].Script.SowDate
            [Lentil].Phenology.EmergenceDAS
            [Lentil].Phenology.BuddingDAS
            [Lentil].Phenology.FloweringDAS
            [Lentil].Phenology.PoddingDAS
            [Lentil].Phenology.MaturityDAS
            [Lentil].Grain.Wt
            [Lentil].Grain.Live.Wt
            [Lentil].Grain.Size
            [Lentil].AboveGround.Wt
            [Lentil].Grain.HarvestIndex
        Report DailyReport
        Operations IrrigationApplications
        Manager ClimateController
          AllowControl = False
          EnableDate = 01/01/0001 00:00:00
          WithinYearControl = False
          ControlStart =
          ControlEnd =
          RainfallMultiplier = 1
          RainfallAddition = 0
          RadiationMultiplier = 1
          RadiationAddition = 0
          MinTMultiplier = 1
          MinTAddition = 0
          MaxTMultiplier = 1
          MaxTAddition = 0
          WindMultiplier = 1
          WindAddition = 0
          VPMultiplier = 1
          VPAddition = 0
          script: same as in Roseworthy.Factors.Permutation.TOSbyIrr.24Apr2018Rainout.ClimateController
        Operations Sow
        Report SowingReport: EventNames=[Clock].EndOfDay
        Manager SetCropParameters
  Experiment Walgett19
    DisabledSimNames=[Walgett19TOS1CvJumbo2Pop150, Walgett19TOS2CvJumbo2Pop150, Walgett19TOS3CvJumbo2Pop150, Walgett19TOS1CvAcePop150, Walgett19TOS2CvAcePop150, Walgett19TOS3CvAcePop150, Walgett19TOS1CvBlitzPop150, Walgett19TOS2CvBlitzPop150, Walgett19TOS3CvBlitzPop150, Walgett19TOS1CvBoltPop150, Walgett19TOS2CvBoltPop150, Walgett19TOS3CvBoltPop150]
    Memo
      **Plant population** - 132 plants/m2 for usual density; assumed 150 plants/m2 for high density.

      **Met file for Walgett** - trial site located at -30.538537,148.614925 near Come By Chance. Several options in SILO:

      * Bungle Gully, Come by Chance is approx 5 km from site
      * Come by Chance store is approx 20 km from site
      * Grid -30.55,148.60 is approx 2 km from site  --> this met file was selected as is closest
    Factors
      Memo
        **Factors at Walgett for lentils**

        ***Time of sowing***

        1. 21 May, 2019
        2. 9 June, 2019
        3. 28 June, 2019

        Starting soil water measured on 19 May before first sowing so same reset to 19 May for all TOS.

        ***Cultivar***

        Ace
        Blitz
        Bolt
        HallmarkXT
        HallmarkXTHigh (high density planting of HallmarkXT)
        Jumbo2
      Permutation
        Factor TOS
          CompositeFactor 1: Specifications=[Sowing].Script.SowDate = 21-May
          CompositeFactor 2: Specifications=[Sowing].Script.SowDate = 9-Jun
          CompositeFactor 3: Specifications=[Sowing].Script.SowDate = 28-Jun
        Factor Cv
          Specification=[Sowing].Script.CultivarName = Ace,Blitz,Bolt,HallmarkXT,Jumbo2
        Factor Pop: Specification=[Sowing].Script.Population = 132,150
    Simulation Walgett19
      Weather: FileName=ExNeil\LentilNextGen\Walgett.met; Latitude=-30.55; Tav=19.29; Amp=16.97
      Clock: Start=2019-05-07; End=2019-11-30
      Summary summaryfile
      SoilArbitrator Soil Arbitrator
      Zone Field: Area=1; Slope=0; AspectAngle=0; Altitude=50
        MicroClimate: a_interception=0; b_interception=1; c_interception=0; d_interception=0; SoilHeatFluxFraction=0.4; MinimumHeightDiffForNewLayer=0; NightInterceptionFraction=0.5; ReferenceHeight=1
        Irrigation
        Fertiliser
        SurfaceOrganicMatter: InitialResidueName=maize; InitialResidueType=maize; InitialResidueMass=500; InitialStandingFraction=0; InitialCPR=0; InitialCNR=65
        Report DailyReport: same as Dooen2001.DR_2001DooenWet.Field.DailyReport
        Report HarvestReport: same as Mildura19.Mildura19.Field.HarvestReport
        Manager Harvesting: same as Dooen2001.DR_2001DooenWet.Field.Harvesting
        Plant Lentil
        Manager Sowing
          SowDate = 25-Apr
          CultivarName = Jumbo2
          SowingDepth = 50
          RowSpacing = 375
          Population = 120
          script: same as in Dooen2001.DR_2001DooenWet.Field.Sowing
        Manager Reset on date: same as Millmerran19.Millmerran19.Field.Reset on date
        Soil: same as Millmerran19.Millmerran19.Field.soil
        Report SowingReport: EventNames=[Clock].EndOfDay
        Manager SetCropParameters
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