Simulations: Version=173
  Folder Replacements
    Report ReportHarvest: EventNames=[Chickpea].Harvesting
      VariableNames:
        [Clock].Today as Date
        [Sowing].Script.CultivarName as Genotype
        [Sowing].Script.SowDate as SowingDate
        [Chickpea].Phenology.EmergenceDAS
        [Chickpea].Phenology.BuddingDAS
        [Chickpea].Phenology.FloweringDAS
        [Chickpea].Phenology.PoddingDAS
        [Chickpea].Phenology.MaturityDAS
        [Chickpea].Grain.Wt
        [Chickpea].Grain.Live.Wt
        [Chickpea].Grain.Size
        [Chickpea].AboveGround.Wt
        [Chickpea].Grain.HarvestIndex
    Report ReportDaily: EventNames=[Clock].DoReport
      VariableNames:
        [Clock].Today as Date
        [Sowing].Script.CultivarName as Genotype
        [Sowing].Script.SowDate as SowingDate
        [Chickpea].AboveGround.Wt
        [Chickpea].CoverGreen
  DataStore
    ExcelInput Observed: FileNames=[apsimLentilObs.xlsx]; SheetNames=[Obs]
    PredictedObserved: AllColumns=false
  Experiment LentilWaterSchemeTOS
    Memo
      Reference: Lake, Lachlan, and Victor O. Sadras. ‘Lentil Yield and Crop Growth Rate Are Coupled under Stress but Uncoupled under Favourable Conditions’. European Journal of Agronomy 126 (1 May 2021): 126266. https://doi.org/10.1016/j.eja.2021.126266.

      Pant material, environments and experimental design:

      We established a factorial experiment with 20 lentil lines varying in seed type and phenology.

      Crops were grown in eight environments that resulted from the combinationof two seasons (2018, 2019), two sowing dates and two water regimes. Early sowings were on the 24th of April 2018 and the 29th April 2019, and the late sowings on the 6th of June 2018 and 24th of June 2019. Early-sown crops were irrigated or rainfed. Rainout shelters were set on earlysown crops to exclude rainfall from 26th June 2018 to harvest and from 1st August 2019 to harvest. Late-sown crops were irrigated or rainfed.

      Each experimental plot comprised six rows, 0.23m apart, 5m long, with target plant density 120 plants/m2.

      Crops were sown after barley on calcic luvisol soil at Roseworthy (34.35, 138.69), South Australia. At sowing, we added 80kg/h amonoammonium phosphate.

      Daily weather data were obtained from the Roseworthy weather station of the Australian Bureau of Meteorology. The amount of irrigation was added to the rainfall of the correponding date in the daily weather data, and the rainfall was set to 0 during rainout period.
    Factors
      Permutation
        Factor Genotype: Specification=[Sowing]
          CompositeFactor Aldinga: Specifications=[Sowing].Script.CultivarName=Aldinga
          CompositeFactor Boomer: Specifications=[Sowing].Script.CultivarName=Boomer
          CompositeFactor CIPAL0901: Specifications=[Sowing].Script.CultivarName=CIPAL0901
          CompositeFactor CIPAL1504: Specifications=[Sowing].Script.CultivarName=CIPAL1504
          CompositeFactor CIPAL1701: Specifications=[Sowing].Script.CultivarName=CIPAL1701
          CompositeFactor Commando: Specifications=[Sowing].Script.CultivarName=Commando
          CompositeFactor Indianhead: Specifications=[Sowing].Script.CultivarName=Indianhead
          CompositeFactor Matilda: Specifications=[Sowing].Script.CultivarName=Matilda
          CompositeFactor NIPPER: Specifications=[Sowing].Script.CultivarName=NIPPER
          CompositeFactor NUGGET: Specifications=[Sowing].Script.CultivarName=NUGGET
          CompositeFactor Northfield: Specifications=[Sowing].Script.CultivarName=Northfield
          CompositeFactor PBAACE: Specifications=[Sowing].Script.CultivarName=PBAACE
          CompositeFactor PBABLITZ: Specifications=[Sowing].Script.CultivarName=PBABLITZ
          CompositeFactor PBABOLT: Specifications=[Sowing].Script.CultivarName=PBABOLT
          CompositeFactor PBAFLASH: Specifications=[Sowing].Script.CultivarName=PBAFLASH
          CompositeFactor PBAGREENFIELD: Specifications=[Sowing].Script.CultivarName=PBAGREENFIELD
          CompositeFactor PBAGiant: Specifications=[Sowing].Script.CultivarName=PBAGiant
          CompositeFactor PBAHURRICANE: Specifications=[Sowing].Script.CultivarName=PBAHURRICANE
          CompositeFactor PBAJUMBO: Specifications=[Sowing].Script.CultivarName=PBAJUMBO
          CompositeFactor PBAJUMBO2: Specifications=[Sowing].Script.CultivarName=PBAJUMBO2
    Simulation 18_ROS_1IR
      Memo
        Early sowing in 2018 with irrigation. Sown at 24th of April 2018.

        Irrigation records:

        TOS 1 Irrigated	26/04/2018	30

        TOS 1 Irrigated	16/05/2018	18

        TOS 1 Irrigated	4/07/2018	11
      Weather: FileName=Met\Roseworthy.met
      Clock: Start=2018-04-24; End=2018-11-30
      Summary summaryfile
      SoilArbitrator Soil Arbitrator
      Zone Field: Area=1; Slope=0; AspectAngle=0; Altitude=50
        Soil Sandy loam over light-medium clays (Roseworthy No300): ASCOrder=Sodosol; ASCSubOrder=Red; SoilType=Sandy clay; Site=Roseworthy; NearestTown=Roseworthy; Region=Mid North; State=South Australia; Country=Australia; ApsoilNumber=300; Latitude=-34.5; Longitude=138.686; LocationAccuracy=+/- 20m; YearOfSampling=0
          DataSource=Characterisation 2005 by University of Adelaide, CSIRO Sustainable Ecosystems and DWLBC. Measurement site located adjacent to site described by Soil and Land Information Group, Department of Water, Land and Biodiversity Conservation, South Australia.
          Comments=Root depth: Wheat 130cm, Canola 100cm, Pea 100cm. Low-moderate clay duplex soil with moderate CEC, moderate-high bulk density.Texture change about 10cm. Slaking or dispersion likely in the lower profile, whilst high ESP and mobility of boron below about 80cm will impede root growth.
          Physical
            Thickness  ParticleSizeClay  ParticleSizeSand  ParticleSizeSilt  BD    AirDry  LL15  DUL   SAT
            150        22                73                4                 1.57  0.04    0.08  0.18  0.38
            150        52                44                4                 1.38  0.144   0.18  0.3   0.45
            300        53                39                8                 1.32  0.18    0.18  0.33  0.47
            300        52                39                8                 1.53  0.18    0.18  0.3   0.39
            300        45                48                7                 1.69  0.18    0.18  0.27  0.33
            300        43                51                5                 1.73  0.18    0.18  0.23  0.32
            BD, DUL source: Field measured and checked for sensibility
            AirDry, LL15 source: Estimated based on local knowledge
            SAT source: Calculated from measured, estimated or calculated BD
            SoilCrop wheatSoil: LL=[0.08, 0.18, 0.18, 0.18, 0.23, 0.23]; KL=[0.06, 0.06, 0.04, 0.04, 0.03, 0.02]; XF=[1, 1, 1, 1, 0.4, 0.32]
              LL source: Field measured and checked for sensibility
            SoilCrop barleySoil: LL=[0.08, 0.18, 0.18, 0.18, 0.23, 0.23]; KL=[0.07, 0.07, 0.07, 0.05, 0.05, 0.05]; XF=[1, 1, 1, 1, 0.4, 0.32]
              LL source: Estimated based on local knowledge
            SoilCrop oatsSoil: LL=[0.08, 0.18, 0.18, 0.18, 0.23, 0.23]; KL=[0.06, 0.06, 0.04, 0.04, 0.03, 0.02]; XF=[1, 1, 1, 1, 0.4, 0.32]
              LL source: Estimated based on local knowledge
            SoilCrop canolaSoil: LL=[0.08, 0.18, 0.18, 0.25, 0.25, 0.23]; KL=[0.06, 0.06, 0.04, 0.04, 0.03, 0.02]; XF=[1, 1, 1, 1, 0.4, 0.32]
              LL source: Field measured and checked for sensibility
            SoilCrop peasSoil: LL=[0.07, 0.22, 0.22, 0.28, 0.27, 0.23]; KL=[0.06, 0.06, 0.06, 0.06, 0.06, 0.06]; XF=[1, 1, 1, 1, 0.4, 0.32]
              LL source: Field measured and checked for sensibility
          WaterBalance SoilWater: SummerDate=1-Nov; SummerU=6; SummerCona=3.5; WinterDate=1-Apr; WinterU=2; WinterCona=2; DiffusConst=88; DiffusSlope=35; Salb=0.13; CN2Bare=73; CNRed=20; CNCov=0.8; PSIDul=-100; Thickness=[150, 150, 300, 300, 300, 300]; SWCON=[0.5, 0.5, 0.5, 0.5, 0.3, 0.3]
          Organic: FOMCNRatio=45; CarbonUnits=Total
            Thickness  Carbon  SoilCNRatio  FBiom  FInert  FOM
            150        1.56    12.5         0.04   0.4     585.896
            150        1.248   12.5         0.02   0.5     434.043
            300        0.78    12.5         0.02   0.7     238.208
            300        0.39    12.5         0.02   1       130.731
            300        0.234   12.5         0.01   1       71.7468
            300        0.156   12.5         0.01   1       39.3755
          Chemical: PHUnits=Water
            Thickness  PH   EC   ESP
            150        7.8  0.1  3.64964
            150        8.3  0.2  4.66926
            300        9.1  0.2  8.47458
            300        9.9  0.5  27.6
            300        9.7  0.9  37.5479
            300        9.5  1    41.129
            EC, CL, PH source: Measured
            ESP source: C
          Nutrient
          Water: Thickness=[150, 150, 300, 300, 300, 300]; InitialValues=[0.07, 0.22, 0.22, 0.28, 0.27, 0.23]; InitialPAWmm=0; RelativeTo=peas; FilledFromTop=false
          CERESSoilTemperature
          Solute NO3: Thickness=[150, 150, 300, 300, 300, 300]; InitialValues=[1, 1, 1, 1, 1, 1]; InitialValuesUnits=ppm; WaterTableConcentration=0; D0=0; DepthConstant=0; MaxDepthSoluteAccessible=0; RunoffEffectivenessAtMovingSolute=0; MaxEffectiveRunoff=0
          Solute NH4: Thickness=[150, 150, 300, 300, 300, 300]; InitialValues=[0.1, 0.1, 0.1, 0.1, 0.1, 0.1]; InitialValuesUnits=ppm; WaterTableConcentration=0; D0=0; DepthConstant=0; MaxDepthSoluteAccessible=0; RunoffEffectivenessAtMovingSolute=0; MaxEffectiveRunoff=0
          Solute Urea: Thickness=[150, 150, 300, 300, 300, 300]; InitialValues=[0, 0, 0, 0, 0, 0]; InitialValuesUnits=ppm; WaterTableConcentration=0; D0=0; DepthConstant=0; MaxDepthSoluteAccessible=0; RunoffEffectivenessAtMovingSolute=0; MaxEffectiveRunoff=0
        Plant Chickpea
        MicroClimate: a_interception=0; b_interception=1; c_interception=0; d_interception=0; SoilHeatFluxFraction=0.4; MinimumHeightDiffForNewLayer=0; NightInterceptionFraction=0.5; ReferenceHeight=1
        Irrigation
        Fertiliser
        SurfaceOrganicMatter: InitialResidueName=maize; InitialResidueType=maize; InitialResidueMass=500; InitialStandingFraction=0; InitialCPR=0; InitialCNR=65
        Manager Sowing
          SowDate = 24-Apr
          CultivarName = Amethyst
          SowingDepth = 50
          RowSpacing = 230
          Population = 120
```csharp
using APSIM.Shared.Utilities;
using Models.Utilities;
using Models.Soils;
using Models.PMF;
using Models.Core;
using System;

namespace Models
{
    [Serializable]
    public class Script : Model
    {
        [Link] Clock Clock;
        [Link] Fertiliser Fertiliser;
        [Link] Summary Summary;
        [Link] Plant Canola;
        [Link] Soil Soil;
        Accumulator accumulatedRain;
        
        [Description("Sowing date (d-mmm)")]
        public string SowDate { get; set; }
        [Description("Cultivar to be sown")]
        public string CultivarName { get; set; }
        [Description("Sowing depth (mm)")]
        public double SowingDepth { get; set; }
        [Description("Row spacing (mm)")]
        public double RowSpacing { get; set; }
        [Description("Plant population (/m2)")]
        public double Population { get; set; }
        
        


        [EventSubscribe("DoManagement")]
        private void OnDoManagement(object sender, EventArgs e)
        {
        
            
            if (DateUtilities.WithinDates(SowDate, Clock.Today, SowDate))
            {
                Canola.Sow(population: Population, cultivar: CultivarName, depth: SowingDepth, rowSpacing: RowSpacing);    
            }
        
        }
        
    }
}
```
        Manager Fertilise at sowing
          Crop = [Chickpea]
          FertiliserType = MAP
          Amount = 80
```csharp
using Models.Soils;
using System;
using Models.Core;
using Models.PMF;
namespace Models
{
    [Serializable]
    public class Script : Model
    {
        [Link] Clock Clock;
        [Link] Fertiliser Fertiliser;
        
        [Description("Crop to be fertilised")]
        public IPlant Crop { get; set; }

        [Description("Type of fertiliser to apply? ")] 
        public Fertiliser.Types FertiliserType { get; set; }
    
        [Description("Amount of fertiliser to be applied (kg/ha)")]
        public double Amount { get; set; }
        
        [EventSubscribe("Sowing")]
        private void OnSowing(object sender, EventArgs e)
        {
            Model crop = sender as Model;
            if (Crop != null && crop.Name.ToLower() == (Crop as IModel).Name.ToLower())
                Fertiliser.Apply(Amount: Amount, Type: FertiliserType);
        }
    }
}
```
        Operations Irrigations
          2018-04-26  [Irrigation].Apply(amount:30);
          2018-05-18  [Irrigation].Apply(amount:18);
          2018-07-04  [Irrigation].Apply(amount:11);
        Manager Harvesting
```csharp
using Models.PMF.Phen;
using System;
using Models.Core;
using System.Collections.Generic;
using System.Text;
using Models.Soils;
using Models.PMF;
using Models;
using System.Xml.Serialization;
using APSIM.Shared.Utilities;

namespace Models
{
    [Serializable] 
    public class Script : Model
    {      
        [Link] private Plant Chickpea;
        [Link] private Zone zone;
        [Link(Type = LinkType.Path, Path = "[Chickpea].Phenology")]
        private Phenology phenology;
                    
        
        [EventSubscribe("StartOfSimulation")]
        private void OnSimulationCommencing(object sender, EventArgs e)
        {
        }       
        
        [EventSubscribe("DoManagement")]
        private void OnDoManagement(object sender, EventArgs e)
        {
        if (phenology.CurrentPhase.Name=="ReadyForHarvesting")
           {
           Chickpea.Harvest();
           Chickpea.EndCrop();
           }
        }
        
        [EventSubscribe("DoManagementCalculations")]
        private void OnDoManagementCalculations(object sender, EventArgs e)
        {
            
        }
    }
}
```
        Report ReportHarvest: same as Replacements.ReportHarvest
        Report ReportDaily: EventNames=[Clock].DoReport
          VariableNames:
            [Clock].Today as Date
            [Sowing].Script.CultivarName as Genotype
            [Sowing].Script.SowDate as SowingDate
            [Chickpea].AboveGround.Wt
            [Chickpea].CoverGreen
    Simulation 18_ROS_1RO
      Memo
        Early sowing in 2018 with rainout shelter to exclude rainfall from 26th June 2018 to harvest.
        Sown at 24th of April 2018.

        Irrigation records:

        TOS 1 Rainout	27/04/2018	30

        TOS 1 Rainout	16/05/2018	18

        TOS 1 Rainout	4/07/2018	11
      Weather: FileName=Met/18_ROS_1RO.met
      Clock: Start=2018-04-24; End=2018-11-30
      Summary summaryfile
      SoilArbitrator Soil Arbitrator
      Zone Field: Area=1; Slope=0; AspectAngle=0; Altitude=50
        Soil Sandy loam over light-medium clays (Roseworthy No300): same as LentilWaterSchemeTOS.18_ROS_1IR.Field.Sandy loam over light-medium clays (Roseworthy No300)
        Plant Chickpea
        MicroClimate: a_interception=0; b_interception=1; c_interception=0; d_interception=0; SoilHeatFluxFraction=0.4; MinimumHeightDiffForNewLayer=0; NightInterceptionFraction=0.5; ReferenceHeight=1
        Irrigation
        Fertiliser
        SurfaceOrganicMatter: InitialResidueName=maize; InitialResidueType=maize; InitialResidueMass=500; InitialStandingFraction=0; InitialCPR=0; InitialCNR=65
        Manager Sowing: same as LentilWaterSchemeTOS.18_ROS_1IR.Field.Sowing
        Manager Fertilise at sowing: same as LentilWaterSchemeTOS.18_ROS_1IR.Field.Fertilise at sowing
        Operations Irrigations
          2018-04-27  [Irrigation].Apply(amount:30);
          2018-05-16  [Irrigation].Apply(amount:18);
          2018-07-04  [Irrigation].Apply(amount:11);
        Manager ClimateControl
          StartDate = 06/26/2018 00:00:00
          EndDate = 12/31/2018 00:00:00
          CCOnOff = True
```csharp
using Models.Soils;
using System.Xml.Serialization;
using Models;
using Models.PMF;
using System.Text;
using System.Collections.Generic;
using APSIM.Shared.Utilities;
using Models.Core;
using System;
using Models.Climate;

namespace Models
{
    [Serializable] 
    [System.Xml.Serialization.XmlInclude(typeof(Model))]
    public class Script : Model
    {
        [Link] Weather Met;
        [Link] Clock Clock;
    
        [Description("Start Date")]
        public DateTime StartDate { get; set; }
        
        [Description("End Date")]
        public DateTime EndDate { get; set; }

        [Description("Turn on or off")]
        public bool CCOnOff { get; set; }
 
        [EventSubscribe("PreparingNewWeatherData")]
        private void OnPreparingNewWeatherData(object sender, EventArgs e)
        {
            if (CCOnOff == true)
            if ((Clock.Today.Date >= StartDate) && (Clock.Today.Date <= EndDate))
                Met.Rain = 0;        
        }
    }
}
```
        Manager Harvesting: same as LentilWaterSchemeTOS.18_ROS_1IR.Field.Harvesting
        Report ReportHarvest: same as Replacements.ReportHarvest
        Report ReportDaily: EventNames=[Clock].DoReport
          VariableNames:
            [Clock].Today as Date
            [Sowing].Script.CultivarName as Genotype
            [Sowing].Script.SowDate as SowingDate
            [Chickpea].AboveGround.Wt
            [Chickpea].CoverGreen
    Simulation 18_ROS_2IR
      Memo
        Late sowing in 2018 with irrigation. Sown on the 6th of June 2018.

        TOS 2 Irrigated 	4/07/2018	12

        TOS 2 Irrigated 	2/09/2018	12

        TOS 2 Irrigated 	26/09/2018	24.4
      Weather: FileName=Met\Roseworthy.met
      Clock: Start=2018-06-06; End=2018-12-31
      Summary summaryfile
      SoilArbitrator Soil Arbitrator
      Zone Field: Area=1; Slope=0; AspectAngle=0; Altitude=50
        Soil Sandy loam over light-medium clays (Roseworthy No300): same as LentilWaterSchemeTOS.18_ROS_1IR.Field.Sandy loam over light-medium clays (Roseworthy No300)
        Plant Chickpea
        MicroClimate: a_interception=0; b_interception=1; c_interception=0; d_interception=0; SoilHeatFluxFraction=0.4; MinimumHeightDiffForNewLayer=0; NightInterceptionFraction=0.5; ReferenceHeight=1
        Irrigation
        Fertiliser
        SurfaceOrganicMatter: InitialResidueName=maize; InitialResidueType=maize; InitialResidueMass=500; InitialStandingFraction=0; InitialCPR=0; InitialCNR=65
        Manager Sowing
          SowDate = 6-Jun
          CultivarName = Amethyst
          SowingDepth = 50
          RowSpacing = 230
          Population = 120
          script: same as in LentilWaterSchemeTOS.18_ROS_1IR.Field.Sowing
        Manager Fertilise at sowing: same as LentilWaterSchemeTOS.18_ROS_1IR.Field.Fertilise at sowing
        Operations Irrigations
          2018-07-04  [Irrigation].Apply(amount:12);
          2018-09-02  [Irrigation].Apply(amount:12);
          2018-09-26  [Irrigation].Apply(amount:24.4);
        Manager Harvesting: same as LentilWaterSchemeTOS.18_ROS_1IR.Field.Harvesting
        Report ReportHarvest: same as Replacements.ReportHarvest
        Report ReportDaily: EventNames=[Clock].DoReport
          VariableNames:
            [Clock].Today as Date
            [Sowing].Script.CultivarName as Genotype
            [Sowing].Script.SowDate as SowingDate
            [Chickpea].AboveGround.Wt
            [Chickpea].CoverGreen
    Simulation 18_ROS_2RF
      Memo
        Late sowing in 2018 with rainfed. Sown on the 6th of June 2018.
      Weather: FileName=Met\Roseworthy.met
      Clock: Start=2018-06-06; End=2018-12-31
      Summary summaryfile
      SoilArbitrator Soil Arbitrator
      Zone Field: Area=1; Slope=0; AspectAngle=0; Altitude=50
        Soil Sandy loam over light-medium clays (Roseworthy No300): same as LentilWaterSchemeTOS.18_ROS_1IR.Field.Sandy loam over light-medium clays (Roseworthy No300)
        Plant Chickpea
        MicroClimate: a_interception=0; b_interception=1; c_interception=0; d_interception=0; SoilHeatFluxFraction=0.4; MinimumHeightDiffForNewLayer=0; NightInterceptionFraction=0.5; ReferenceHeight=1
        Irrigation
        Fertiliser
        SurfaceOrganicMatter: InitialResidueName=maize; InitialResidueType=maize; InitialResidueMass=500; InitialStandingFraction=0; InitialCPR=0; InitialCNR=65
        Manager Sowing: same as LentilWaterSchemeTOS.18_ROS_2IR.Field.Sowing
        Manager Fertilise at sowing: same as LentilWaterSchemeTOS.18_ROS_1IR.Field.Fertilise at sowing
        Manager Harvesting: same as LentilWaterSchemeTOS.18_ROS_1IR.Field.Harvesting
        Report ReportHarvest: same as Replacements.ReportHarvest
        Report ReportDaily: EventNames=[Clock].DoReport
          VariableNames:
            [Clock].Today as Date
            [Sowing].Script.CultivarName as Genotype
            [Sowing].Script.SowDate as SowingDate
            [Chickpea].AboveGround.Wt
            [Chickpea].CoverGreen
    Simulation 19_ROS_1IR
      Memo
        Early sowing in 2019 with irrigation. Sown on the 29th of Apr 2019.

        TOS 1 Irrigated	29/08/2019	22

        TOS 1 Irrigated	12/09/2019	15

        TOS 1 Irrigated	4/10/2019	22

        TOS 1 Irrigated	21/10/2019	22
      Weather: FileName=Met\Roseworthy.met
      Clock: Start=2019-04-29; End=2019-12-05
      Summary summaryfile
      SoilArbitrator Soil Arbitrator
      Zone Field: Area=1; Slope=0; AspectAngle=0; Altitude=50
        Soil Sandy loam over light-medium clays (Roseworthy No300): same as LentilWaterSchemeTOS.18_ROS_1IR.Field.Sandy loam over light-medium clays (Roseworthy No300)
        Plant Chickpea
        MicroClimate: a_interception=0; b_interception=1; c_interception=0; d_interception=0; SoilHeatFluxFraction=0.4; MinimumHeightDiffForNewLayer=0; NightInterceptionFraction=0.5; ReferenceHeight=1
        Irrigation
        Fertiliser
        SurfaceOrganicMatter: InitialResidueName=maize; InitialResidueType=maize; InitialResidueMass=500; InitialStandingFraction=0; InitialCPR=0; InitialCNR=65
        Manager Sowing
          SowDate = 29-Apr
          CultivarName = Amethyst
          SowingDepth = 50
          RowSpacing = 230
          Population = 120
          script: same as in LentilWaterSchemeTOS.18_ROS_1IR.Field.Sowing
        Manager Fertilise at sowing: same as LentilWaterSchemeTOS.18_ROS_1IR.Field.Fertilise at sowing
        Operations Irrigations
          2019-08-29  [Irrigation].Apply(amount:22);
          2019-09-12  [Irrigation].Apply(amount:15);
          2019-10-04  [Irrigation].Apply(amount:22);
          2019-10-21  [Irrigation].Apply(amount:22);
        Manager Harvesting: same as LentilWaterSchemeTOS.18_ROS_1IR.Field.Harvesting
        Report ReportHarvest: same as Replacements.ReportHarvest
        Report ReportDaily: EventNames=[Clock].DoReport
          VariableNames:
            [Clock].Today as Date
            [Sowing].Script.CultivarName as Genotype
            [Sowing].Script.SowDate as SowingDate
            [Chickpea].AboveGround.Wt
            [Chickpea].CoverGreen
    Simulation 19_ROS_1RO
      Memo
        Early sowing in 2019 with rainout shelter to exclude rainfall from 1st Aug 2019 to harvest.
        Sown on the 29th of Apr 2019.
      Weather: FileName=Met\Roseworthy.met
      Clock: Start=2019-04-29; End=2019-12-05
      Summary summaryfile
      SoilArbitrator Soil Arbitrator
      Zone Field: Area=1; Slope=0; AspectAngle=0; Altitude=50
        Soil Sandy loam over light-medium clays (Roseworthy No300): same as LentilWaterSchemeTOS.18_ROS_1IR.Field.Sandy loam over light-medium clays (Roseworthy No300)
        Plant Chickpea
        MicroClimate: a_interception=0; b_interception=1; c_interception=0; d_interception=0; SoilHeatFluxFraction=0.4; MinimumHeightDiffForNewLayer=0; NightInterceptionFraction=0.5; ReferenceHeight=1
        Irrigation
        Fertiliser
        SurfaceOrganicMatter: InitialResidueName=maize; InitialResidueType=maize; InitialResidueMass=500; InitialStandingFraction=0; InitialCPR=0; InitialCNR=65
        Manager Sowing: same as LentilWaterSchemeTOS.19_ROS_1IR.Field.Sowing
        Manager Fertilise at sowing: same as LentilWaterSchemeTOS.18_ROS_1IR.Field.Fertilise at sowing
        Manager ClimateControl
          StartDate = 08/01/2019 00:00:00
          EndDate = 12/31/2019 00:00:00
          CCOnOff = True
          script: same as in LentilWaterSchemeTOS.18_ROS_1RO.Field.ClimateControl
        Manager Harvesting: same as LentilWaterSchemeTOS.18_ROS_1IR.Field.Harvesting
        Report ReportHarvest: same as Replacements.ReportHarvest
        Report ReportDaily: EventNames=[Clock].DoReport
          VariableNames:
            [Clock].Today as Date
            [Sowing].Script.CultivarName as Genotype
            [Sowing].Script.SowDate as SowingDate
            [Chickpea].AboveGround.Wt
            [Chickpea].CoverGreen
    Simulation 19_ROS_2IR
      Memo
        Late sowing in 2019 with irrigation. Sown on the 24th of June 2019.

        TOS 2 Irrigated 	29/08/2019	22

        TOS 2 Irrigated 	15/09/2019	40

        TOS 2 Irrigated 	4/10/2019	22

        TOS 2 Irrigated 	21/10/2019	22
      Weather: FileName=Met\Roseworthy.met
      Clock: Start=2019-06-24; End=2019-12-31
      Summary summaryfile
      SoilArbitrator Soil Arbitrator
      Zone Field: Area=1; Slope=0; AspectAngle=0; Altitude=50
        Soil Sandy loam over light-medium clays (Roseworthy No300): same as LentilWaterSchemeTOS.18_ROS_1IR.Field.Sandy loam over light-medium clays (Roseworthy No300)
        Plant Chickpea
        MicroClimate: a_interception=0; b_interception=1; c_interception=0; d_interception=0; SoilHeatFluxFraction=0.4; MinimumHeightDiffForNewLayer=0; NightInterceptionFraction=0.5; ReferenceHeight=1
        Irrigation
        Fertiliser
        SurfaceOrganicMatter: InitialResidueName=maize; InitialResidueType=maize; InitialResidueMass=500; InitialStandingFraction=0; InitialCPR=0; InitialCNR=65
        Manager Sowing
          SowDate = 24-Jun
          CultivarName = Amethyst
          SowingDepth = 50
          RowSpacing = 230
          Population = 120
          script: same as in LentilWaterSchemeTOS.18_ROS_1IR.Field.Sowing
        Manager Fertilise at sowing: same as LentilWaterSchemeTOS.18_ROS_1IR.Field.Fertilise at sowing
        Operations Irrigations
          2019-08-29  [Irrigation].Apply(amount:22);
          2019-09-15  [Irrigation].Apply(amount:40);
          2019-10-04  [Irrigation].Apply(amount:22);
          2019-10-21  [Irrigation].Apply(amount:22);
        Manager Harvesting: same as LentilWaterSchemeTOS.18_ROS_1IR.Field.Harvesting
        Report ReportHarvest: same as Replacements.ReportHarvest
        Report ReportDaily: EventNames=[Clock].DoReport
          VariableNames:
            [Clock].Today as Date
            [Sowing].Script.CultivarName as Genotype
            [Sowing].Script.SowDate as SowingDate
            [Chickpea].AboveGround.Wt
            [Chickpea].CoverGreen
    Simulation 19_ROS_2RF
      Memo
        Late sowing in 2019 with rainfed. Sown on the 24th of June 2019.
      Weather: FileName=Met\Roseworthy.met
      Clock: Start=2019-06-24; End=2019-12-31
      Summary summaryfile
      SoilArbitrator Soil Arbitrator
      Zone Field: Area=1; Slope=0; AspectAngle=0; Altitude=50
        Soil Sandy loam over light-medium clays (Roseworthy No300): ASCOrder=Sodosol; ASCSubOrder=Red; SoilType=Sandy clay; Site=Roseworthy; NearestTown=Roseworthy; Region=Mid North; State=South Australia; Country=Australia; ApsoilNumber=300; Latitude=-34.5; Longitude=138.686; LocationAccuracy=+/- 20m; YearOfSampling=0
          DataSource=Characterisation 2005 by University of Adelaide, CSIRO Sustainable Ecosystems and DWLBC. Measurement site located adjacent to site described by Soil and Land Information Group, Department of Water, Land and Biodiversity Conservation, South Australia.
          Comments=Root depth: Wheat 130cm, Canola 100cm, Pea 100cm. Low-moderate clay duplex soil with moderate CEC, moderate-high bulk density.Texture change about 10cm. Slaking or dispersion likely in the lower profile, whilst high ESP and mobility of boron below about 80cm will impede root growth.
          Physical: same as LentilWaterSchemeTOS.18_ROS_1IR.Field.Sandy loam over light-medium clays (Roseworthy No300).Physical
          WaterBalance SoilWater: same as LentilWaterSchemeTOS.18_ROS_1IR.Field.Sandy loam over light-medium clays (Roseworthy No300).SoilWater
          Organic: FOMCNRatio=45; CarbonUnits=Total
            Thickness  Carbon  SoilCNRatio  FBiom  FInert  FOM
            150        1.56    12.5         0.04   0.4     585.896
            150        1.248   12.5         0.02   0.5     434.043
            300        0.78    12.5         0.02   0.7     238.208
            300        0.39    12.5         0.02   1       130.731
            300        0.234   12.5         0.01   1       71.747
            300        0.156   12.5         0.01   1       39.375
          Chemical: same as LentilWaterSchemeTOS.18_ROS_1IR.Field.Sandy loam over light-medium clays (Roseworthy No300).Chemical
          Nutrient
          Water: Thickness=[150, 150, 300, 300, 300, 300]; InitialValues=[0.07, 0.22, 0.22, 0.28, 0.27, 0.23]; InitialPAWmm=0; RelativeTo=peas; FilledFromTop=false
          CERESSoilTemperature
          Solute NO3: same as LentilWaterSchemeTOS.18_ROS_1IR.Field.Sandy loam over light-medium clays (Roseworthy No300).NO3
          Solute NH4: same as LentilWaterSchemeTOS.18_ROS_1IR.Field.Sandy loam over light-medium clays (Roseworthy No300).NH4
          Solute Urea: same as LentilWaterSchemeTOS.18_ROS_1IR.Field.Sandy loam over light-medium clays (Roseworthy No300).Urea
        Plant Chickpea
        MicroClimate: a_interception=0; b_interception=1; c_interception=0; d_interception=0; SoilHeatFluxFraction=0.4; MinimumHeightDiffForNewLayer=0; NightInterceptionFraction=0.5; ReferenceHeight=1
        Irrigation
        Fertiliser
        SurfaceOrganicMatter: InitialResidueName=maize; InitialResidueType=maize; InitialResidueMass=500; InitialStandingFraction=0; InitialCPR=0; InitialCNR=65
        Manager Sowing: same as LentilWaterSchemeTOS.19_ROS_2IR.Field.Sowing
        Manager Fertilise at sowing: same as LentilWaterSchemeTOS.18_ROS_1IR.Field.Fertilise at sowing
        Manager Harvesting: same as LentilWaterSchemeTOS.18_ROS_1IR.Field.Harvesting
        Report ReportHarvest: same as Replacements.ReportHarvest
        Report ReportDaily: EventNames=[Clock].DoReport
          VariableNames:
            [Clock].Today as Date
            [Sowing].Script.CultivarName as Genotype
            [Sowing].Script.SowDate as SowingDate
            [Chickpea].AboveGround.Wt
            [Chickpea].CoverGreen
