Simulations: Version=2
  Memo Introduction
    The APSIM Maize model has been tested on a range of datasets from around the world to provide tests across a range of environmental conditions.  Tests include ranges in plant population, nitrogen management and irrigation levels, as well as including historical datasets from africa using cultivars developed during the 1960's, through to modern varieties grown in the American mid-West.
  Replacements
    Plant Maize: CropType=Maize
      Memo TitlePage
        # The APSIM Maize Model

        _Brown, H.E., Teixeira, E.I., Huth, N.I. and Holzworth, D.P._

        The APSIM maize model has been developed using the Plant Modelling Framework (PMF) of [brown_plant_2014]. This new framework provides a library of plant organ and process submodels that can be coupled, at runtime, to construct a model in much the same way that models can be coupled to construct a simulation. This means that dynamic composition of lower level process and organ classes (e.g. photosynthesis, leaf) into larger constructions (e.g. maize, wheat, sorghum) can be achieved by the model developer without additional coding.

        The model consists of:

        * a phenology model to simulate development between growth phases
        * a structure model to simulate plant morphology
        * a collection of organs to simulate the various plant parts
        * an arbitrator to allocate resources (N, biomass) to the various plant organs
      OrganArbitrator Arbitrator: NArbitrationOption=RelativeAllocation; DMArbitrationOption=RelativeAllocation
      Phenology
        MultiplyFunction ThermalTime
          AirTemperatureFunction BaseThermalTime
            XYPairs: X=[0, 18, 26, 34, 44]; Y=[0, 10, 18, 26, 0]
        GerminatingPhase Germinating: Start=Sowing; End=Germination
        EmergingPhase Emerging: Start=Germination; End=Emergence; ShootLag=55; ShootRate=0.6
          VariableReference ThermalTime: VariableName=[Phenology].ThermalTime.Value
        GenericPhase Juvenile: Start=Emergence; End=EndJuvenile
          Constant Target: Value=200; Units=deg day
          VariableReference ThermalTime: VariableName=[Phenology].ThermalTime.Value
        GenericPhase Photosensitive: Start=EndJuvenile; End=FloralInitiation
          VariableReference ThermalTime: VariableName=[Phenology].ThermalTime.Value
          LinearInterpolationFunction Target: XProperty=[Phenology].Photoperiod.Value
            Memo
              The photoperiod is likely to vary with individual maize cultivars.  Therefore, the response shown here is indicative only.  See the descriptions of individual cultivars for more detail on photoperiod responses used by the maize model.
            XYPairs: X=[0, 12.5, 24]; Y=[0, 0, 10]
        LeafAppearancePhase LeafAppearance: Start=FloralInitiation; End=FlagLeaf
          VariableReference ThermalTime: VariableName=[Phenology].ThermalTime.Value
        GenericPhase FlagLeafToFlowering: Start=FlagLeaf; End=Flowering
          Constant Target: Value=50; Units=deg day
          VariableReference ThermalTime: VariableName=[Phenology].ThermalTime.Value
        GenericPhase FloweringToGrainFilling: Start=Flowering; End=StartGrainFill
          Constant Target: Value=120; Units=deg day
          VariableReference ThermalTime: VariableName=[Phenology].ThermalTime.Value
        GenericPhase GrainFilling: Start=StartGrainFill; End=EndGrainFill
          Constant Target: Value=550; Units=deg day
          VariableReference ThermalTime: VariableName=[Phenology].ThermalTime.Value
        GenericPhase Maturing: Start=EndGrainFill; End=Maturity
          Constant Target: Value=10; Units=deg day
          VariableReference ThermalTime: VariableName=[Phenology].ThermalTime.Value
        GenericPhase MaturityToHarvestRipe: Start=Maturity; End=HarvestRipe
          Constant Target: Value=10; Units=deg day
          VariableReference ThermalTime: VariableName=[Phenology].ThermalTime.Value
        EndPhase ReadyForHarvesting: Start=HarvestRipe; End=Unused
          VariableReference ThermalTime: VariableName=[Phenology].ThermalTime.Value
        PhotoperiodFunction Photoperiod: Twilight=-6
        OnEventFunction FloweringDAS: SetEvent=Flowering; ReSetEvent=never
          Memo
            A function is used to provide flowering date as days after sowing(DAS).
          Constant PreEventValue: Value=0
          VariableReference PostEventValue: VariableName=[Phenology].DaysAfterSowing
        OnEventFunction MaturityDAS: SetEvent=Maturity; ReSetEvent=never
          Memo
            A function is used to provide maturity date as days after sowing(DAS).
          Constant PreEventValue: Value=0
          VariableReference PostEventValue: VariableName=[Phenology].DaysAfterSowing
      Structure: InitialiseStage=Emergence; PrimaryBudNo=1
        Memo
          Though tillering is common in some maize varieties under certain agronomic conditions, no tillering is accounted for within this model.  Therefore all branching has been parameterised out of the current maize model.
        VariableReference ThermalTime: VariableName=[Phenology].ThermalTime.Value
        PhaseLookup MainStemPrimordiaInitiationRate
          PhaseLookupValue Plastochron: Start=Emergence; End=FloralInitiation
            MultiplyFunction Plastochron
              VariableReference Phyllochron: VariableName=[Structure].MainStemNodeAppearanceRate.Value
              Constant LeafTipsPerPrimordia: Value=0.5
        PhaseLookup MainStemNodeAppearanceRate
          PhaseLookupValue Phyllochron: Start=Emergence; End=FlagLeaf
            LinearInterpolationFunction Phyllochron: XProperty=[Structure].MainStemNodeNo
              XYPairs: X=[1, 3.4, 4]; Y=[30, 30, 42]
        MainStemFinalNodeNumberFunction MainStemFinalNodeNumber: MaximumMainStemNodeNumber=30
          OnEventFunction FinalLeafNumber: SetEvent=FloralInitiation
            AddFunction PreEventValue
              Constant PrimordiaAtEmergence: Value=6
              DivideFunction PrimordiaDuringJuvenilePhase
                VariableReference JuvenilePhaseDuration: VariableName=[Phenology].Juvenile.Target.Value
                Constant ApproximatePlastochron: Value=15
            VariableReference PostEventValue: VariableName=[Structure].MainStemPrimordiaNo
        HeightFunction HeightModel
          LinearInterpolationFunction PotentialHeight: XProperty=[Phenology].Stage
            XYPairs: X=[3, 4, 5, 6]; Y=[20, 400, 450, 1700]
          LinearInterpolationFunction WaterStress: XProperty=[Maize].WaterSupplyDemandRatio
            XYPairs: X=[0, 0.6]; Y=[0, 1]
        Constant BranchingRate: Value=0
        Constant ShadeInducedBranchMortality: Value=0
        Constant DroughtInducedBranchMortality: Value=0
      ReproductiveOrgan Grain: FractionRemoved=0; FractionToResidue=0
        Constant InitialGrainProportion: Value=0.05
        Constant MaximumPotentialGrainSize: Value=0.3; Units=g
        Constant MaximumGrainsPerCob: Value=700; Units=number
        PhaseLookup DMDemandFunction
          PhaseLookupValue InitialPhase: Start=Flowering; End=StartGrainFill
            FillingRateFunction
              VariableReference GrainNumber: VariableName=[Grain].NumberFunction.Value
              VariableReference FillingDuration: VariableName=[Phenology].FloweringToGrainFilling.Target.Value
              VariableReference ThermalTime: VariableName=[Phenology].ThermalTime.Value
              MultiplyFunction PotentialSizeIncrement
                VariableReference InitialProportion: VariableName=[Grain].InitialGrainProportion.Value
                VariableReference MaximumSize: VariableName=[Grain].MaximumPotentialGrainSize.Value
          PhaseLookupValue LinearPhase: Start=StartGrainFill; End=EndGrainFill
            FillingRateFunction
              VariableReference GrainNumber: VariableName=[Grain].NumberFunction.Value
              VariableReference FillingDuration: VariableName=[Phenology].GrainFilling.Target.Value
              VariableReference ThermalTime: VariableName=[Phenology].ThermalTime.Value
              MultiplyFunction PotentialSizeIncrement
                SubtractFunction ProportionLinearPhase
                  Constant One: Value=1
                  VariableReference InitialProportion: VariableName=[Grain].InitialGrainProportion.Value
                VariableReference MaximumSize: VariableName=[Grain].MaximumPotentialGrainSize.Value
        Biomass Live
        Biomass Dead
        Constant MinimumNConc: Value=0.008; Units=g/g
        PhaseLookup MaximumNConc
          PhaseLookupValue InitialPhase: Start=Flowering; End=StartGrainFill
            Constant InitialNconc: Value=0.05
          PhaseLookupValue LinearPhase: Start=StartGrainFill; End=EndGrainFill
            Constant FinalNconc: Value=0.013
        Constant WaterContent: Value=0.12; Units=g/g
        PhaseLookup NFillingRate
          PhaseLookupValue GrainFilling: Start=Flowering; End=EndGrainFill
            FillingRateFunction
              VariableReference GrainNumber: VariableName=[Grain].NumberFunction.Value
              AddFunction FillingDuration
                VariableReference FloweringToGrainFilling: VariableName=[Phenology].FloweringToGrainFilling.Target.Value
                VariableReference GrainFilling: VariableName=[Phenology].GrainFilling.Target.Value
              VariableReference ThermalTime: VariableName=[Phenology].ThermalTime.Value
              MultiplyFunction PotentialSizeIncrement
                Constant MaximumFinalNConc: Value=0.013
                VariableReference MaximumSize: VariableName=[Grain].MaximumPotentialGrainSize.Value
        MultiplyFunction NumberFunction
          VariableReference PotentialGrainNumber: VariableName=[MaximumGrainsPerCob].Value
          LinearInterpolationFunction GrowthRateFactor: XProperty=[GrowthRateGrainDevelopment].Value
            XYPairs: X=[0.55, 3.3, 6.6, 10]; Y=[0, 0.6, 1, 1]
          VariableReference Population: VariableName=[Maize].Population
        ExpressionFunction YieldBuPerAcre: Expression=[Grain].Live.Wt * 10 * 56 * 0.4536 * 2.471
        AccumulateFunction GrowthGrainDevelopment: StartStageName=FlagLeaf; EndStageName=StartGrainFill
          VariableReference DailyBiomassProduction: VariableName=[Arbitrator].DMSupply
        AccumulateFunction DaysGrainDevelopment: StartStageName=FlagLeaf; EndStageName=StartGrainFill
          Constant LenthOfADay: Value=1; Units=days/day
        DivideFunction GrowthRateGrainDevelopment
          VariableReference AccumulatedGrowth: VariableName=[GrowthGrainDevelopment].Value
          VariableReference GrowthDuration: VariableName=[DaysGrainDevelopment].Value
          VariableReference Population: VariableName=[Maize].Population
      Root: FractionRemoved=0; FractionToResidue=0; InitialDM=0.2; SpecificRootLength=40000; KNO3_yProperty=[0.03, 0.03]; KNO3_xRootLength=[0.003, 0.003]; KNH4_yProperty=[0, 0.0003]; KNH4_xRootLength=[0, 0.003]; NuptakeSupply=0
        CompositeBiomass Live: Propertys=[[Root].LayerLive]
        CompositeBiomass Dead: Propertys=[[Root].LayerDead]
        LinearInterpolationFunction KLModifier: XProperty=[Maize].Population
          Memo
            The parameter KL is is described by Meinke et al (1993) to combine elements of soil conductivity (K) with root length (L) in determining root water uptake.  Peake et al (2013) demonstrated that in maize KL varied with plant population through impacts on root length density.  Here we adjust KL linearly with plant population.
          XYPairs: X=[0, 10]; Y=[1, 1]
        Constant SoilWaterEffect: Value=1
          Memo
            No effect of soil water content on root growth is currently captured in the model.
        Constant TemperatureEffect: Value=1
          Memo
            No effect of temperature on root growth is currently captured in the model.
        Constant MaxDailyNUptake: Value=20; Units=g/m2/d
          Memo
            Maximum daily N uptake is set to an arbitrarily high value.
        Constant SenescenceRate: Value=0.005; Units=/d
          Memo
            Jones and Kiniry (1986) used a constant root senescence fraction in the CERES-Maize model.
        Constant StructuralFraction: Value=1
        Constant MaximumNConc: Value=0.01; Units=g/g
        Constant MinimumNConc: Value=0.01; Units=g/g
        LinearInterpolationFunction PartitionFraction: XProperty=[Phenology].Stage
          XYPairs: X=[0, 2.99, 3, 6, 7]; Y=[0, 0, 0.2, 0.2, 0]
        PhaseLookup RootFrontVelocity
          Memo
            [Hammer_etal_2009] used a constant extraction front velocity of 2.5cm per day in their analysis of historical maize yield trends in the US corn belt.
          PhaseLookupValue PreFlowering: Start=Germination; End=Flowering
            Constant RootFrontVelocity: Value=25; Units=mm/d
          PhaseLookupValue PostFlowering: Start=Flowering; End=Maturity
            Constant RootFrontVelocity: Value=0; Units=mm/d
        PhaseBasedSwitch NitrogenDemandSwitch: Start=Germination; End=Maturity
      Leaf: MaxCover=1; Albedo=0.18; Gsmax=0.009; R50=160; KDead=0.03
        zero: FractionRemoved, FractionToResidue, CurrentExpandingLeaf, StartFractionExpanded, FractionNextleafExpanded, _ExpandedNodeNo, DeadNodesYesterday, FRGR, PotentialEP, FractionDied
        LeafCohort InitialLeaves[1]: Rank=1; Area=380
        LeafCohort InitialLeaves[2]: Rank=2; Area=0
        LeafCohort InitialLeaves[3]: Rank=3; Area=0
        LeafCohort InitialLeaves[4]: Rank=4; Area=0
        LeafCohort InitialLeaves[5]: Rank=5; Area=0
        LeafCohort InitialLeaves[6]: Rank=6; Area=0
        CompositeBiomass Live: Propertys=[[Leaf].CohortLive]
        CompositeBiomass Dead: Propertys=[[Leaf].CohortDead]
        ArrayBiomass CohortArrayLive: Propertys=[[Leaf].Live]; ArraySize=[Leaf].MaxNodeNo
        ArrayBiomass CohortArrayDead: Propertys=[[Leaf].Dead]; ArraySize=[Leaf].MaxNodeNo
        LeafCohortParameters CohortParameters
          BellCurveFunction MaxArea
            Memo
              Potential leaf area is calculated from leaf number using the approach of Keating and Wafula (1992).
              Individual leaf size is described using a bell-shaped curve, the parameters of which are derived from final leaf number.
            MultiplyFunction LargestLeafPosition
              VariableReference FinalLeafNumber: VariableName=[Structure].MainStemFinalNodeNumber.Value
              Constant RelativePositionOfLargestLeaf: Value=0.67
            LinearInterpolationFunction AreaMax: XProperty=[Structure].MainStemFinalNodeNumber.Value
              XYPairs: X=[1, 5, 10, 15, 20, 25]; Y=[32530, 39259, 49659, 60000, 75000, 90000]
            LinearInterpolationFunction Breadth: XProperty=[Structure].MainStemFinalNodeNumber.Value
              XYPairs: X=[5, 10, 15, 20, 25]; Y=[-0.377, -0.144, -0.059, -0.027, -0.016]
            Constant Skewness: Value=0.00025
          Constant NReallocationFactor: Value=1
          Constant NRetranslocationFactor: Value=0.03
          Constant DMRetranslocationFactor: Value=0.5
          LinearInterpolationFunction CellDivisionStress: XProperty=[Maize].WaterSupplyDemandRatio
            XYPairs: X=[0.9, 1]; Y=[1, 1]
          LinearInterpolationFunction ExpansionStress: XProperty=[Maize].WaterSupplyDemandRatio
            XYPairs: X=[0.1, 0.7, 1]; Y=[0, 1, 1]
          LinearInterpolationFunction GrowthDuration: XProperty=[Structure].RelativeNodeApperance
            XYPairs: X=[0, 0.3, 0.5, 1]; Y=[0, 200, 250, 100]
          LinearInterpolationFunction LagDuration: XProperty=[Structure].RelativeNodeApperance
            XYPairs: X=[0, 0.4, 0.6]; Y=[300, 300, 650]
          LinearInterpolationFunction SenescenceDuration: XProperty=[Structure].RelativeNodeApperance
            XYPairs: X=[0, 0.4, 0.6]; Y=[150, 150, 350]
          Constant DetachmentLagDuration: Value=1000000
          Constant DetachmentDuration: Value=1000000
          LinearInterpolationFunction MaximumNConc: XProperty=[Structure].MainStemNodeNo
            XYPairs: X=[1, 10]; Y=[0.054, 0.03]
          Constant CriticalNConc: Value=0.015; Units=g/g
          Constant MinimumNConc: Value=0.008; Units=g/g
          AddFunction DroughtInducedSenAcceleration
            Constant One: Value=1
            MultiplyFunction Stress
              Constant StressResponseCoefficient: Value=1
              LinearInterpolationFunction StressFactor: XProperty=[Maize].WaterSupplyDemandRatio
                XYPairs: X=[0, 1]; Y=[0.5, 0]
          LinearInterpolationFunction SpecificLeafAreaMax: XProperty=[Structure].MainStemNodeNo
            XYPairs: X=[1, 9]; Y=[50000, 25000]
          LinearInterpolationFunction SpecificLeafAreaMin: XProperty=[Structure].MainStemNodeNo
            XYPairs: X=[1, 9]; Y=[8000, 8000]
          Constant StructuralFraction: Value=0.7
          Constant NonStructuralFraction: Value=0
          LinearInterpolationFunction ShadeInducedSenescenceRate: XProperty=[Leaf].CohortCurrentRankCoverAbove
            XYPairs: X=[0, 0.7, 0.8, 0.96, 0.99]; Y=[0, 0, 0, 0, 0]
          Constant InitialNConc: Value=0; Units=g/g
        RUEModel Photosynthesis
          Constant RUE: Value=2
          WeightedTemperatureFunction FT: MaximumTemperatureWeighting=0.75
            XYPairs: X=[0, 8, 15, 35, 50]; Y=[0, 0, 1, 1, 0]
          LinearInterpolationFunction FVPD: XProperty=[Leaf].Photosynthesis.VPD
            XYPairs: X=[0, 10, 50]; Y=[1, 1, 1]
          LinearInterpolationFunction FN: XProperty=[Leaf].Fn
            XYPairs: X=[0, 1]; Y=[0.3, 1]
          LinearInterpolationFunction FW: XProperty=[Leaf].Fw
            XYPairs: X=[0, 0.3]; Y=[0, 1]
          RUECO2Function FCO2: PhotosyntheticPathway=C4
          VariableReference RadnInt: VariableName=[Leaf].RadIntTot
        MultiplyFunction ExtinctionCoeff
          Memo
            Extinction coefficient is specified in terms of a potential extinction coefficient which is then discounted during periods of water stress to account for the impact of leaf curling.
          LinearInterpolationFunction PotentialExtinctionCoeff: XProperty=[Maize].SowingData.RowSpacing
            XYPairs: X=[0.2, 0.5, 1]; Y=[0.7, 0.5, 0.4]
          LinearInterpolationFunction WaterStressImpact: XProperty=[Maize].WaterSupplyDemandRatio
            XYPairs: X=[0, 0.7]; Y=[0.5, 1]
        LinearInterpolationFunction FrostFraction: XProperty=[Weather].MinT
          XYPairs: X=[-2, 2]; Y=[1, 0]
        VariableReference ThermalTime: VariableName=[Phenology].ThermalTime.Value
        MinimumFunction FRGRFunction
          VariableReference FT: VariableName=[Leaf].Photosynthesis.FT.Value
          VariableReference FN: VariableName=[Leaf].Photosynthesis.FN.Value
          VariableReference FVPD: VariableName=[Leaf].Photosynthesis.FVPD.Value
      GenericAboveGroundOrgan Husk: FractionRemoved=0; FractionToResidue=0
        PopulationBasedDemandFunction DMDemandFunction
          VariableReference ThermalTime: VariableName=[Phenology].ThermalTime.Value
          Constant StartStage: Value=5.2
          Constant GrowthDuration: Value=120
          Constant MaximumOrganWt: Value=25
          VariableReference OrganPopulation: VariableName=[Rachis].CobNumber.Value
          LinearInterpolationFunction ExpansionStress: XProperty=[Maize].WaterSupplyDemandRatio
            XYPairs: X=[0.3, 0.8]; Y=[0, 1]
        Biomass Live
        Biomass Dead
        Constant NReallocationFactor: Value=0
        Constant NRetranslocationFactor: Value=0.1
        Constant MaximumNConc: Value=0.01; Units=g/g
        Constant StructuralFraction: Value=0.3; Units=g/g
        Constant MinimumNConc: Value=0.01; Units=g/g
        Constant DMRetranslocationFactor: Value=0.1
      GenericAboveGroundOrgan Rachis: FractionRemoved=0; FractionToResidue=0
        MultiplyFunction CobNumber
          VariableReference StemNumber: VariableName=[Structure].TotalStemPopn
          Constant CobsPerStem: Value=1.1
        DivideFunction CobSize
          VariableReference CobMass: VariableName=[Rachis].Live.Wt
          VariableReference CobNumber: VariableName=[Rachis].CobNumber.Value
        PopulationBasedDemandFunction DMDemandFunction
          VariableReference ThermalTime: VariableName=[Phenology].ThermalTime.Value
          Constant StartStage: Value=5.5
          Constant GrowthDuration: Value=300
          Constant MaximumOrganWt: Value=23
          VariableReference OrganPopulation: VariableName=[Rachis].CobNumber.Value
          LinearInterpolationFunction ExpansionStress: XProperty=[Maize].WaterSupplyDemandRatio
            XYPairs: X=[0, 0.35]; Y=[0, 1]
        Biomass Live
        Biomass Dead
        Constant NReallocationFactor: Value=0
        Constant NRetranslocationFactor: Value=0.1
        Constant MaximumNConc: Value=0.008; Units=g/g
        Constant StructuralFraction: Value=1; Units=g/g
        Constant MinimumNConc: Value=0.003; Units=g/g
        LinearInterpolationFunction ExpansionStress: XProperty=[Maize].WaterSupplyDemandRatio
          XYPairs: X=[0.1, 0.7]; Y=[0, 1]
      GenericAboveGroundOrgan Stem: FractionRemoved=0; FractionToResidue=0
        Biomass Live
        Biomass Dead
        Constant StructuralFraction: Value=0.7
        LinearInterpolationFunction MaximumNConc: XProperty=[Structure].MainStemNodeNo
          XYPairs: X=[0, 10, 11]; Y=[0.03, 0.03, 0.005]
        Constant MinimumNConc: Value=0.006; Units=g/g
        PhaseBasedSwitch NitrogenDemandSwitch: Start=Emergence; End=StartGrainFill
        Constant NReallocationFactor: Value=0
        Constant NRetranslocationFactor: Value=0.5
        Constant DMRetranslocationFactor: Value=0.1
        MinimumFunction DMDemandFunctionX
          MultiplyFunction PotentialDMAccumulation
            VariableReference NodesAppearing: VariableName=[Structure].DeltaNodeNumber
            VariableReference Branches: VariableName=[Structure].TotalStemPopn
            LinearInterpolationFunction PotentialInternodeWt: XProperty=[Structure].RelativeNodeApperance
              XYPairs: X=[0, 0.2, 0.8, 1]; Y=[0, 2, 16, 16]
          MultiplyFunction HightLimitedDMAccumulation
            Constant SpecificStemLengthMax: Value=0.1
              Constant SpecificStemLengthMax: Value=0.1
            VariableReference Branches: VariableName=[Structure].TotalStemPopn
            VariableReference DeltaHeight: VariableName=[Structure].HeightModel.DeltaHeight
        PartitionFractionDemandFunction DMDemandFunction
          PhaseLookup PartitionFraction
            PhaseLookupValue PreStemElongation: Start=Emergence; End=FloralInitiation
              Constant StemFraction: Value=0.6
            PhaseLookupValue StemElongation: Start=FloralInitiation; End=Flowering
              Constant StemFraction: Value=0.82
      CompositeBiomass AboveGround
        Propertys=[[Leaf].Live, [Leaf].Dead, [Stem].Live, [Stem].Dead, [Husk].Live, [Husk].Dead, [Grain].Live, [Grain].Dead, [Rachis].Live, [Rachis].Dead]
        Memo
          The AboveGround composite biomass object includes all organs occurring above the soil surface to allow output for total dry matter and Nutrient contents, including total structural, non-structural and metabolic pools.
      CompositeBiomass BelowGround: Propertys=[[Root].Live, [Root].Dead]
        Memo
          The BelowGround composite biomass object includes all root biomass pools to allow output for total dry matter and Nutrient contents, including total structural, non-structural and metabolic pools.
      CompositeBiomass Total
        Propertys=[[Leaf].Live, [Leaf].Dead, [Stem].Live, [Stem].Dead, [Husk].Live, [Husk].Dead, [Grain].Live, [Grain].Dead, [Rachis].Live, [Rachis].Dead, [Root].Live, [Root].Dead]
        Memo
          The Total composite biomass object includes all organs (above+below ground) to allow output for total dry matter and Nutrient contents, including total structural, non-structural and metabolic pools.
      CompositeBiomass TotalLive
        Propertys=[[Leaf].Live, [Stem].Live, [Husk].Live, [Grain].Live, [Rachis].Live, [Root].Live]
        Memo
          The TotalLive composite biomass object includes the Live pools of all organs (above+below ground) to allow output for total dry matter and Nutrient contents, including total structural, non-structural and metabolic pools.
      CompositeBiomass TotalDead
        Propertys=[[Leaf].Dead, [Stem].Dead, [Husk].Dead, [Grain].Dead, [Rachis].Dead, [Root].Dead]
        Memo
          The TotalDead composite biomass object includes the Dead pools of all organs (above+below ground) to allow output for total dry matter and Nutrient contents, including total structural, non-structural and metabolic pools.
      CompositeBiomass EarLive: Propertys=[[Husk].Live, [Grain].Live, [Rachis].Live]
        Memo
          The EarLive composite biomass object includes the Live pools of all organs within the Ear to allow output for total dry matter and Nutrient contents, including total structural, non-structural and metabolic pools.
      CompositeBiomass AboveGroundLive
        Propertys=[[Leaf].Live, [Stem].Live, [Husk].Live, [Grain].Live, [Rachis].Live]
        Memo
          The AboveGroundLive composite biomass object includes the Live pools of all organs occurring above the soil surface to allow output for total dry matter and Nutrient contents, including total structural, non-structural and metabolic pools.
      CompositeBiomass AboveGroundDead
        Propertys=[[Leaf].Dead, [Stem].Dead, [Husk].Dead, [Grain].Dead, [Rachis].Dead]
        Memo
          The AboveGroundDead composite biomass object includes the Dead pools of all organs occurring above the soil surface to allow output for total dry matter and Nutrient contents, including total structural, non-structural and metabolic pools.
      Memo Future Development Needs
        #Future Development requirements

        * Phenology not responding to stress events.  Requires better data sets for quantifying the effects of water and nitrogen on leaf apperance and the timing of development stages.
        * Phosphorus response
        * Improved parameterisation of supply and demand for N and DM from organs and arbitration of these resources.
        * Heat Stress responses in grain number
        * More validation under a wider range of environments with more detailed datasets
        * Seedling mortality
        * Water demand (MicroClimate) needs validation
      Cultivar Pioneer_39G12
        Command:
          [Phenology].GrainFilling.Target.Value = 550
          [Grain].MaximumGrainsPerCob.Value = 550
          [Grain].NumberFunction.GrowthRateFactor.XYPairs.X = 0.2,2,4,10
          [Grain].NumberFunction.GrowthRateFactor.XYPairs.Y = 0,0.6,1,1
      Cultivar Pioneer_3153
      Cultivar Katumani
        Command:
          [Phenology].Juvenile.Target.Value = 150
          [Phenology].Photosensitive.Target.XYPairs.X = 0, 12.5, 24
          [Phenology].Photosensitive.Target.XYPairs.Y = 0, 0, 115
          [Phenology].FlagLeafToFlowering.Target.Value = 10
          [Phenology].FloweringToGrainFilling.Target.Value = 120
          [Phenology].GrainFilling.Target.Value = 530
          [Rachis].DMDemandFunction.MaximumOrganWt.Value = 14
          [Grain].MaximumGrainsPerCob.Value = 405
          [Grain].MaximumPotentialGrainSize.Value = 0.375
        Memo
          The variety Katumani Composite B was formed in 1966 and released in 1968 as part of the maize breeding work undertaken at the Katumani Research Station in Kenya which started in 1956.  Katumani Composite B was an advanced generation of Katumani Synthetic V X Katumani Synthetic VI.  It has slight photoperiod sensitivity and relatively small potential cob size.
      Cultivar Dekalb_XL82
        Command:
          [Phenology].Juvenile.Target.Value = 211
          [Phenology].Photosensitive.Target.XYPairs.X = 0, 12.5, 24
          [Phenology].Photosensitive.Target.XYPairs.Y = 0, 0, 472
          [Phenology].FlagLeafToFlowering.Target.Value = 101
          [Phenology].FloweringToGrainFilling.Target.Value = 170
          [Phenology].GrainFilling.Target.Value = 813
          [Rachis].DMDemandFunction.MaximumOrganWt.Value = 25
          [Grain].MaximumGrainsPerCob.Value = 550
      Cultivar GH_5009
        Command:
          [Phenology].Juvenile.Target.Value = 220
          [Phenology].Photosensitive.Target.XYPairs.X = 0, 12.5, 24
          [Phenology].Photosensitive.Target.XYPairs.Y = 0, 0, 300
          [Phenology].FlagLeafToFlowering.Target.Value = 50
          [Phenology].FloweringToGrainFilling.Target.Value = 170
          [Phenology].GrainFilling.Target.Value = 713
          [Rachis].DMDemandFunction.MaximumOrganWt.Value = 25
          [Grain].MaximumGrainsPerCob.Value =  550
      Cultivar Hycorn_40
        Command:
          [Phenology].Juvenile.Target.Value = 220
          [Phenology].Photosensitive.Target.XYPairs.X = 0, 12.5, 24
          [Phenology].Photosensitive.Target.XYPairs.Y = 0, 0, 124
          [Phenology].FlagLeafToFlowering.Target.Value = 50
          [Phenology].FloweringToGrainFilling.Target.Value = 170
          [Phenology].GrainFilling.Target.Value = 713
          [Rachis].DMDemandFunction.MaximumOrganWt.Value = 25
          [Grain].MaximumGrainsPerCob.Value =  550
      Cultivar GH_5019WX
        Command:
          [Phenology].Juvenile.Target.Value = 255
          [Phenology].Photosensitive.Target.XYPairs.X = 0, 12.5, 24.0
          [Phenology].Photosensitive.Target.XYPairs.Y = 0, 0, 124
          [Phenology].FlagLeafToFlowering.Target.Value = 101
          [Phenology].FloweringToGrainFilling.Target.Value = 170
          [Phenology].GrainFilling.Target.Value = 694
          [Rachis].DMDemandFunction.MaximumOrganWt.Value = 25
          [Grain].MaximumGrainsPerCob.Value = 550
      Cultivar Laila
        Command:
          [Phenology].Juvenile.Target.Value = 211
          [Phenology].Photosensitive.Target.XYPairs.X = 0, 12.5, 24
          [Phenology].Photosensitive.Target.XYPairs.Y = 0, 0, 0
          [Phenology].FlagLeafToFlowering.Target.Value = 1
          [Phenology].FloweringToGrainFilling.Target.Value = 170
          [Phenology].GrainFilling.Target.Value = 812
          [Phenology].Maturing.Target.Value = 1
          [Phenology].MaturityToHarvestRipe.Target.Value = 1
          [Rachis].DMDemandFunction.MaximumOrganWt.Value = 36
          [Grain].MaximumGrainsPerCob.Value =  720
      Cultivar Pioneer_39V43
        Command:
          [Phenology].Juvenile.Target.Value = 150
          [Phenology].GrainFilling.Target.Value = 450
          [Phenology].FloweringToGrainFilling.Target.Value = 170
          [Structure].MainStemNodeAppearanceRate.Phyllochron.Phyllochron.XYPairs.X = 1, 4, 4.2, 10.5, 11
          [Structure].MainStemNodeAppearanceRate.Phyllochron.Phyllochron.XYPairs.Y = 26, 26, 46, 46, 70
          [Rachis].DMDemandFunction.MaximumOrganWt.Value = 18
          [Structure].HeightModel.PotentialHeight.XYPairs.X = 3, 4, 5, 6
          [Structure].HeightModel.PotentialHeight.XYPairs.Y = 20, 40, 50, 1300
        Memo
          VShort duration variety released in New Zealand by Pioneer
      Cultivar Pioneer_34K77
        Command:
          [Phenology].Juvenile.Target.Value = 280
          [Phenology].GrainFilling.Target.Value = 550
        Memo
          VShort duration variety released in New Zealand by Pioneer
      Cultivar Pioneer_38H20
        Command:
          [Phenology].Juvenile.Target.Value = 210
          [Phenology].GrainFilling.Target.Value = 550
      Cultivar Pioneer_33M54
        Command:
          [Phenology].GrainFilling.Target.Value = 550
          [Phenology].Juvenile.Target.Value = 270
      Cultivar Hycorn_53
        Command:
          [Phenology].Juvenile.Target.Value = 235
          [Phenology].Photosensitive.Target.XYPairs.X = 0, 12.5, 24
          [Phenology].Photosensitive.Target.XYPairs.Y = 0, 0, 124
          [Phenology].FlagLeafToFlowering.Target.Value = 10
          [Phenology].FloweringToGrainFilling.Target.Value = 170
          [Phenology].GrainFilling.Target.Value = 520
          [Rachis].DMDemandFunction.MaximumOrganWt.Value = 25
          [Grain].MaximumGrainsPerCob.Value =  550
  DataStore
    ExcelInput Observed: FileName=%root%\Prototypes\Maize\Observations\obsDataMaize_DB.xlsx; SheetNames=[HarvestData]
    PredictedObserved: PredictedTableName=HarvestReport; ObservedTableName=HarvestData; FieldNameUsedForMatch=Stage
      Tests: POName=PredictedObserved
        AcceptedStats:
          Name          n    Slope     Intercept  SEslope    SEintercept  R2        RMSE       NSE        ME         MAE        RSR
          GrainWt       103  0.857035  94.8567    0.0398124  27.7229      0.821051  146.162    0.818896   8.25656    112.89     0.423493
          Biomass       88   1.05859   -95.4621   0.045178   61.9212      0.864574  249.292    0.819515   -22.8932   189.375    0.422415
          LAImax        74   0.989046  0.0801029  0.0472821  0.14235      0.858702  0.542222   0.837502   0.0505981  0.432346   0.400378
          GPSM          84   0.922791  61.2053    0.0386966  92.766       0.873976  445.021    0.864603   -98.6039   338.325    0.365767
          GrainSize     78   0.368377  0.216104   0.111832   0.0321023    0.124934  0.0749238  -0.823744  0.0382094  0.0517097  1.34178
          FloweringDAS  90   0.681055  19.5595    0.0767012  4.33329      0.472557  5.5116     0.318221   1.66667    4.33333    0.821099
          MaturityDAS   90   0.888122  14.6704    0.0513997  5.8493       0.772348  8.23273    0.738515   2.06667    6.24444    0.508507
          FinalLeafNo   21   0.832486  3.25415    0.140805   2.65047      0.647858  0.608818   0.582859   0.104896   0.487392   0.630299
        AcceptedStatsName=Name n Slope Intercept SEslope SEintercept R2 RMSE NSE ME MAE RSR
    ExcelInput ObservedTimeSeries: FileName=%root%\Prototypes\Maize\Observations\obsDataMaize_DB.xlsx; SheetNames=[TimeSeriesData]
    ExcelInput NZObserved: FileName=%root%\Prototypes\Maize\Observations\obsDataMaize_DB.xlsx; SheetNames=[observed]
    ExcelInput RainShelterN: FileName=%root%\Prototypes\Maize\Observations\obsDataMaize_DB.xlsx; SheetNames=[RainShelterNitrogen]
    ExcelInput RainShelterSW: FileName=%root%\Prototypes\Maize\Observations\SoilWater.xlsx; SheetNames=[SoilWater]
    ExcelInput RainShelterCob: FileName=%root%\Prototypes\Maize\Observations\obsDataMaize_DB.xlsx; SheetNames=[RachisHusk_RainS]
    TimeSeriesStats: TableName=PredictedObserved
    ExcelInput PhenologySimple: FileName=%root%\Prototypes\Maize\Observations\obsDataMaize_DB.xlsx; SheetNames=[PhenologySimple]
    ExcelInput RainShelterSen: FileName=Observations\LeafSenesCount.xlsx; SheetNames=[EndSenes]
    ExcelInput RainShelterSenStart: FileName=Observations\LeafSenesCount.xlsx; SheetNames=[StartSenes]
    ExcelInput RainShelterLeafSize: FileName=Observations\IndLeafData_MaizeRainshelter.xlsx; SheetNames=[MaxLeafSize]
  Folder Africa
    Memo
      A selection of data from Kenya has been included from the work of [Keating_etal_1992].  These include the trial originally labelled JMW2 by the original authors and was labelled Experiment 6 in [Keating_etal_1992].  This trial includes maize (cultivar Katumani Composite B) sown at 5 populations (1.1, 2.2, 4.4, 6.6 and 8.8 plants/m2) under low (0 kg N/ha applied) and high (120 kgN/ha) fertiliser conditions during the Long Rains of 1988.  This same experimental design was conducted at two locations, Katumani (1o 35' S, 37o 14' E) and Kiboko (2o 13' S, 37o 43' E). The trial was rainfed at Katumani but fully irrigated at Kiboko.  Yields ranged from 2000 to 5400 kg/ha at Katumani and 1000 to 6000 kg/ha at Kiboko.  There were strong population x nitrogen interactions at both sites.  A second trial refered to as BMW1 or Experiment 1 in [Keating_etal_1992].  A range of populations (2.0-6.5 plants/m2) and irrigation treatments (6-176 mm) where planted under high (80 kgN/ha) and low (0kgN/ha) fertiliser conditions at Katumani. Individual replicates are modelled separately due to variability in soil (depth to rock), establishment and irrigation application.  Grain yields varied from 1600 to 8000 kg/ha.

      Note.  The BMW1 trail consists of data from unreplicated plots.
    Experiment JMW2Katumani
      Factors
        Factor Popn: Specifications=[Sowing]
          Operations 11
            1988-03-24  [Maize].Sow(population:1.1, cultivar:"Katumani", depth:50, rowSpacing:750);
          Operations 22
            1988-03-24  [Maize].Sow(population:2.18, cultivar:"Katumani", depth:50, rowSpacing:750);
          Operations 44
            1988-03-24  [Maize].Sow(population:4.22, cultivar:"Katumani", depth:50, rowSpacing:750);
          Operations 66
            1988-03-24  [Maize].Sow(population:6.2, cultivar:"Katumani", depth:50, rowSpacing:750);
          Operations 88
            1988-03-24  [Maize].Sow(population:7.3, cultivar:"Katumani", depth:50, rowSpacing:750);
        Factor Fert: Specifications=[NRate]
          Operations N0
          Operations N120
            1988-04-15  [Fertiliser].Apply(60, Fertiliser.Types.NH4NO3N, 10);
            1988-04-29  [Fertiliser].Apply(60, Fertiliser.Types.NH4NO3N, 10);
      Simulation JMW2Katumani: Area=0; Slope=0
        Memo
          <?xml version="1.0" encoding="UTF-8"?>
          <!DOCTYPE html PUBLIC "-//W3C//DTD XHTML 1.1//EN" "http://www.w3.org/TR/xhtml11/DTD/xhtml11.dtd">
        Weather: FileName=%root%\Prototypes\Maize\KATUMANI.MET
        Clock: StartDate=1988-01-01; EndDate=1988-09-30
        Summary summaryfile
        SoilArbitrator Soil Arbitrator
        Zone Field: Area=1; Slope=0
          Plant Maize: CropType=Maize
          MicroClimate: a_interception=0; b_interception=1; c_interception=0; d_interception=0; soil_albedo=0.23; air_pressure=1010; soil_emissivity=0.96; sun_angle=15; soil_heat_flux_fraction=0.4; night_interception_fraction=0.5; windspeed_default=3; refheight=2; albedo=0.15; emissivity=0.96; gsmax=0.01; r50=200
          Irrigation
          Fertiliser
          SurfaceOrganicMatter: PoolName=maize; type=maize; mass=500; standing_fraction=0; cnr=65; CriticalResidueWeight=2000; OptimumDecompTemp=20; MaxCumulativeEOS=20; CNRatioDecompCoeff=0.277; CNRatioDecompThreshold=25; TotalLeachRain=25; MinRainToLeach=10; CriticalMinimumOrganicC=0.004; DefaultCPRatio=0; DefaultStandingFraction=0; StandingExtinctCoeff=0.5; FractionFaecesAdded=0.5
            Pools:
              {PoolName=maize, ResidueType=maize, Mass=500, CNRatio=65, StandingFraction=0}
            ResidueTypes ResidueTypesList: LoadFromResource=ResidueTypes
          Operations Sowing
          Operations NRate
            1985-11-08  [Fertiliser].Apply(50, Fertiliser.Types.NH4NO3N, 10);
            1985-11-29  [Fertiliser].Apply(30, Fertiliser.Types.NH4NO3N, 10);
          Manager ExtraVariables
```csharp
using System;
using Models.Core;
using System.Collections.Generic;
using System.Text;
using Models.Soils;
using Models.PMF;
using Models;
using System.Xml.Serialization;
using APSIM.Shared.Utilities;

namespace Models
{
	[Serializable] 
	public class Script : Model
	{      
		[Link] Clock Clock;
		[Link] Soils.Soil Soil;
		[Link] Models.SurfaceOM.SurfaceOrganicMatter SOM;
		[Link] Weather Met;   
		[Link] Fertiliser Fert;
		[Link] Irrigation Irrig;  
		[Link] Plant Maize;          
		[Link] Zone zone;			
					
		[XmlIgnore] public bool InitialDay { get; set; }
		
		[XmlIgnore] public double AccumPlantN { get; set; }
		[XmlIgnore] public double AccumMineralisation { get; set; }
		[XmlIgnore] public double AccumDenit { get; set; }
		[XmlIgnore] public double AccumFert { get; set; }
		[XmlIgnore] public double AccumLeach { get; set; }
		[XmlIgnore] public double AccumDetach { get; set; }
		[XmlIgnore] public double DeltaSoilOMN { get; set; }
		[XmlIgnore] public double DeltaSurfaceOMN { get; set; }
		[XmlIgnore] public double DeltaSoilMineralN { get; set; }
		[XmlIgnore] public double SoilNitrogenContent { get; set; }
		
		[XmlIgnore] public double AccumEO { get; set; }
		[XmlIgnore] public double AccumEP { get; set; }
		[XmlIgnore] public double AccumES { get; set; }
		[XmlIgnore] public double AccumDrainage { get; set; }
		[XmlIgnore] public double AccumRunoff { get; set; }
		[XmlIgnore] public double AccumOutflowLat { get; set; }
		[XmlIgnore] public double AccumIrrigation { get; set; }
		[XmlIgnore] public double AccumRainfall { get; set; }
		[XmlIgnore] public double SoilWaterDeficit { get; set; }
	
		[XmlIgnore] public double  InitialSoilOMN { get; set; }
		[XmlIgnore] public double  InitialSurfaceOMN { get; set; }
		[XmlIgnore] public double  InitialMineralN { get; set; }
		
		[XmlIgnore] public double SWC { get; set; }
		[XmlIgnore] public double DUL { get; set; }
		[XmlIgnore] public double OutFlowLat { get; set; }

		[XmlIgnore] public double FomN { get; set; }
		[XmlIgnore] public double BiomN { get; set; }
		[XmlIgnore] public double HumN { get; set; }
		[XmlIgnore] public double OrganicN { get; set; }
		[XmlIgnore] public double NO3N { get; set; }
		[XmlIgnore] public double NH4N { get; set; }
		[XmlIgnore] public double UreaN { get; set; }
		[XmlIgnore] public double MineralN { get; set; }
		[XmlIgnore] public double DltNMinRes { get; set; }
		[XmlIgnore] public double DltNMinTot { get; set; }
		
		[XmlIgnore] public double LeafExpandedPosition {get; set;}
        [XmlIgnore] public double LeafAppearedPosition {get; set;}
        [XmlIgnore] public double ExpandedLeafNoYesterday {get; set;}
        [XmlIgnore] public double AppearedLeafNoYesterday {get; set;}
        [XmlIgnore] public double MostRecentlyExpandedLeafSize {get; set;}
        [XmlIgnore] public double MostRecentlyAppearedLeafMaxSize {get; set;}
        
        [EventSubscribe("Commencing")]
        private void OnSimulationCommencing(object sender, EventArgs e)
        {
			InitialDay = true;
			LeafExpandedPosition = 0;
			LeafAppearedPosition = 0;
			ExpandedLeafNoYesterday = 0;
			AppearedLeafNoYesterday = 0;
			MostRecentlyExpandedLeafSize = 0;
			MostRecentlyAppearedLeafMaxSize = 0;
		}	   
		
		[EventSubscribe("DoManagement")]
		private void OnDoManagement(object sender, EventArgs e)
		{
			//!!!!!! Nitrogen balance components !!!!!!
			//!!!!!!^^^^^^^^^^^^^^^^^^^^^^^^^^^^^!!!!!!
           	FomN = MathUtilities.Sum(Soil.SoilNitrogen.FOMN);
			HumN = MathUtilities.Sum(Soil.SoilNitrogen.HumicN);
		    BiomN = MathUtilities.Sum(Soil.SoilNitrogen.MicrobialN);
			OrganicN = FomN + HumN + BiomN;
			NO3N = MathUtilities.Sum(Soil.NO3N);
			NH4N = MathUtilities.Sum(Soil.NH4N);
			UreaN = MathUtilities.Sum(Soil.SoilNitrogen.urea);
			MineralN = NO3N + NH4N + UreaN; 
			DltNMinRes = MathUtilities.Sum(Soil.SoilNitrogen.dlt_n_min_res);
			DltNMinTot = MathUtilities.Sum(Soil.SoilNitrogen.MineralisedN);
            int layers = Soil.Thickness.Length;
			if (InitialDay == true)
			{
				InitialSurfaceOMN = SOM.N;
				InitialSoilOMN = OrganicN;
				InitialMineralN = MineralN;
				InitialDay = false;
			}
			AccumFert += Fert.NitrogenApplied;
			DeltaSurfaceOMN = SOM.N - InitialSurfaceOMN;
			AccumLeach = AccumLeach - Soil.SoilWater.LeachNH4 - Soil.SoilWater.LeachNO3 - Soil.SoilWater.LeachUrea; //Fails
            AccumMineralisation += MathUtilities.Sum(Soil.SoilNitrogen.MineralisedN);
            AccumDenit -= MathUtilities.Sum(Soil.SoilNitrogen.Denitrification);
			AccumPlantN -= (double)zone.Get("Maize.Root.NUptake");
			DeltaSoilOMN = OrganicN - InitialSoilOMN;
			DeltaSoilMineralN = MineralN - InitialMineralN;
			SoilNitrogenContent = MineralN;
			
			//!!!!!! Water balance components !!!!!!
			//!!!!!!^^^^^^^^^^^^^^^^^^^^^^^^^^!!!!!!

			AccumIrrigation += Irrig.IrrigationApplied;
			AccumRainfall += Met.Rain;
			//AccumEP -= (double)zone.Get("[Maize].Leaf.Transpiration");
            AccumEP -= (double)zone.Get("Maize.Root.WaterUptake");
			SoilWaterDeficit =  (SWC - DUL);
			double OutFlowLat = MathUtilities.Sum(Soil.SoilWater.outflow_lat);
			AccumOutflowLat -= OutFlowLat;
			
			//Leaf number variable
			ExpandedLeafNoYesterday = (double)zone.Get("Maize.Leaf.ExpandedCohortNo");
			AppearedLeafNoYesterday = (double)zone.Get("Maize.Leaf.AppearedCohortNo");
		}
		
		[EventSubscribe("DoManagementCalculations")]
		private void OnDoManagementCalculations(object sender, EventArgs e)
		{
			FomN = MathUtilities.Sum(Soil.SoilNitrogen.FOMN);
			HumN = MathUtilities.Sum(Soil.SoilNitrogen.HumicN);
		    BiomN = MathUtilities.Sum(Soil.SoilNitrogen.MicrobialN);
			
			
			AccumEO -= Soil.SoilWater.Eo;
			AccumES -= Soil.SoilWater.Es; 
			AccumDrainage -= Soil.SoilWater.Drainage;
			AccumRunoff -= Soil.SoilWater.Runoff;
			SWC = MathUtilities.Sum(Soil.SoilWater.SWmm);
			DUL = MathUtilities.Sum(Soil.SoilWater.DULmm);
			
			if ((double)zone.Get("Maize.Leaf.ExpandedCohortNo") > ExpandedLeafNoYesterday)
			{
			LeafExpandedPosition = (double)zone.Get("Maize.Leaf.ExpandedCohortNo");
			MostRecentlyExpandedLeafSize = (double)zone.Get("Maize.Leaf.CohortSize["+(int)LeafExpandedPosition+"]");
			}
			else
			LeafExpandedPosition = 0;
			
			if ((double)zone.Get("Maize.Leaf.AppearedCohortNo") > AppearedLeafNoYesterday) 
			{
			LeafAppearedPosition = (double)zone.Get("Maize.Leaf.AppearedCohortNo");
			MostRecentlyAppearedLeafMaxSize = (double)zone.Get("Maize.Leaf.CohortParameters.MaxArea.Value");
			}
			//else
			//LeafAppearedPosition = 0;
			
		}
	}
}
```
          Arbitrator: ArbitrationMethod=Old; NutrientUptakeMethod=2
          Report: EventNames=[Clock].DoReport
            VariableNames:
              [Clock].Today
              [ExtraVariables].Script.AccumPlantN
              [ExtraVariables].Script.AccumMineralisation
              [ExtraVariables].Script.AccumDenit
              [ExtraVariables].Script.AccumFert
              [ExtraVariables].Script.AccumLeach
              [ExtraVariables].Script.AccumDetach
              [ExtraVariables].Script.DeltaSoilOMN
              [ExtraVariables].Script.DeltaSurfaceOMN
              [ExtraVariables].Script.DeltaSoilMineralN
              [ExtraVariables].Script.SWC
              [ExtraVariables].Script.DUL
              [ExtraVariables].Script.OutFlowLat
              [ExtraVariables].Script.AccumEO
              [ExtraVariables].Script.AccumEP
              [ExtraVariables].Script.AccumES
              [ExtraVariables].Script.AccumDrainage
              [ExtraVariables].Script.AccumRunoff
              [ExtraVariables].Script.AccumRainfall
              [ExtraVariables].Script.AccumIrrigation
              [ExtraVariables].Script.AccumOutflowLat
              [ExtraVariables].Script.SoilWaterDeficit
              [ExtraVariables].Script.SoilNitrogenContent
              [ExtraVariables].Script.FomN
              [ExtraVariables].Script.HumN
              [ExtraVariables].Script.BiomN
              [ExtraVariables].Script.DltNMinRes
              [ExtraVariables].Script.DltNMinTot
              [Soil].SoilWater.SW
              [Soil].SoilWater.Eo
              [Soil].SoilWater.Es
              [Soil].SoilWater.Drainage
              [Soil].SoilWater.Runoff
              [Soil].SoilWater.pond
              sum([Soil].SoilWater.SWmm) as ProfileWater
              [Soil].NO3N
              [MicroClimate].net_radn
              [MicroClimate].peta
              [MicroClimate].petr
              [Maize].Grain.Live.Wt
              [Maize].Grain.YieldBuPerAcre
              [Maize].Stem.Live.Wt
              [Maize].EarLive.Wt
              [Maize].Leaf.Live.Wt
              [Maize].Root.Live.Wt
              [Maize].Husk.Live.Wt
              [Maize].EarLive.N
              [Maize].Grain.Live.N
              [Maize].Stem.Live.N
              [Maize].Leaf.Live.N
              [Maize].Root.Live.N
              [Maize].Root.WaterSupply
              [Maize].Root.WaterUptake
              [Maize].Leaf.Transpiration
              [Maize].Leaf.WaterDemand
              [Maize].Root.Depth
              [Maize].Leaf.CoverTotal
              [Maize].Leaf.CoverDead
              [Maize].Leaf.LAI
              [Maize].Leaf.Height
              [Maize].Leaf.CohortParameters.MaxArea.Value
              [Maize].Leaf.Fw
              [Maize].Leaf.Fn
              [Maize].Phenology.CurrentPhaseName
              [Maize].Phenology.Stage
              [Maize].AboveGroundLive.N
              [Maize].AboveGroundLive.Wt
              [Maize].Total.N
              [Maize].Total.Wt
              [Maize].Arbitrator.NDemand
              [Maize].Phenology.Stage
              [Maize].Leaf.ExpandedCohortNo
              [Maize].Leaf.AppearedCohortNo
              [Maize].Leaf.CohortArea[1:30]
              [ExtraVariables].Script.LeafAppearedPosition
              [ExtraVariables].Script.MostRecentlyAppearedLeafMaxSize
              [ExtraVariables].Script.LeafExpandedPosition
              [ExtraVariables].Script.MostRecentlyExpandedLeafSize
              [Maize].Grain.NumberFunction.Value
              [Maize].Grain.NumberFunction.StemNumber.Value
              [Maize].Grain.NumberFunction.CobsPerStem.Value
              [Maize].Grain.NumberFunction.KernalsPerCob.Value
              [Maize].Grain.NumberFunction.GrainPerKernal.Value
              [Maize].Rachis.CobSize.Value
          Soil: Latitude=0; Longitude=0
            Water
              Thickness  BD    AirDry  LL15  DUL   SAT
              100        1.35  0.04    0.14  0.25  0.35
              100        1.35  0.14    0.14  0.25  0.35
              100        1.35  0.14    0.14  0.29  0.37
              200        1.4   0.15    0.15  0.29  0.37
              200        1.4   0.16    0.16  0.29  0.38
              200        1.4   0.16    0.16  0.29  0.38
              200        1.4   0.16    0.16  0.29  0.38
              200        1.4   0.16    0.16  0.29  0.38
              400        1.4   0.16    0.16  0.29  0.38
              SoilCrop MaizeSoil: LL=[0.14, 0.14, 0.14, 0.15, 0.16, 0.16, 0.16, 0.16, 0.16]; KL=[0.08, 0.08, 0.08, 0.08, 0.06, 0.04, 0.03, 0.02, 0.01]; XF=[1, 1, 1, 1, 1, 1, 1, 1, 1]
            SoilWater: residueinterception=0; SummerDate=1-Nov; SummerU=9; SummerCona=3; WinterDate=1-Apr; WinterU=9; WinterCona=3; DiffusConst=88; DiffusSlope=35.4; Salb=0.13; CN2Bare=50; CNRed=20; CNCov=0.8; max_pond=0; Thickness=[100, 100, 100, 200, 200, 200, 200, 200, 200]; SWCON=[0.5, 0.5, 0.5, 0.5, 0.5, 0.5, 0.5, 0.5, 0.5]
            SoilNitrogen: fom_type=[default, manure, mucuna, lablab, shemp, stable]; fract_carb=[0.2, 0.3, 0.54, 0.57, 0.45, 0]; fract_cell=[0.7, 0.3, 0.37, 0.37, 0.47, 0.1]; fract_lign=[0.1, 0.4, 0.09, 0.06, 0.08, 0.9]; wfpsN2N2O_x=[22, 88]; wfpsN2N2O_y=[0.1, 1]
            SoilOrganicMatter: RootCN=45; RootWt=1000; SoilCN=14.5; EnrACoeff=7.4; EnrBCoeff=0.2; OCUnits=Total
              Thickness  OC    FBiom  FInert
              100        1.2   0.02   0.42
              100        1     0.01   0.5
              100        0.86  0.01   0.58
              200        0.83  0.01   0.55
              200        0.58  0.01   0.86
              200        0.54  0.01   0.9
              200        0.47  0.01   0.95
              200        0.5   0.01   0.95
              200        0.5   0.01   0.95
            Analysis: Thickness=[100, 100, 100, 200, 200, 200, 200, 200, 200]; PH=[6, 6, 6, 6.2, 6.5, 6.7, 6.8, 6.8, 6.8]; PHUnits=Water; BoronUnits=HotWater
            Sample InitialN: NO3Units=ppm; NH4Units=ppm; SWUnits=Volumetric; OCUnits=Total; PHUnits=Water
              Thickness  NO3  NH4
              100        5    1.7
              100        7    1.8
              100        2    1.5
              200        1    1.4
              200        1    1.3
              200        0.8  1.2
              200        0.8  1.1
              200        0.9  1
              200        0.5  1.2
            Sample InitialSW: Thickness=[100, 100, 100, 200, 200, 200, 200, 200, 200]; NO3Units=ppm; NH4Units=ppm; SWUnits=Volumetric; OCUnits=Total; PHUnits=Water
              SW=[0.162, 0.162, 0.17, 0.178, 0.186, 0.186, 0.186, 0.186, 0.222]
          Report HarvestReport: EventNames=[Maize].Harvesting
            VariableNames:
              [Clock].Today
              [Maize].Phenology.CurrentStageName as Stage
              [Maize].Grain.Live.Wt as GrainWt
              [Maize].Stem.Live.Wt
              [Maize].EarLive.Wt
              [Maize].Leaf.Live.Wt
              [Maize].Root.Live.Wt
              [Maize].Husk.Live.Wt
              [Maize].Rachis.Live.Wt
              [Maize].EarLive.N
              [Maize].Grain.Live.N
              [Maize].Stem.Live.N
              [Maize].Leaf.Live.N
              [Maize].Root.Live.N
              [Maize].Root.Depth
              [Maize].AboveGround.N
              [Maize].AboveGround.Wt as Biomass
              [Maize].Total.N
              [Maize].Total.Wt
              max of [Maize].Leaf.LAI from [Maize].Sowing to [Maize].Harvesting as LAImax
              [Maize].Grain.NumberFunction.Value as GPSM
              [Maize].Grain.Size as GrainSize
              [Maize].Population
              [Maize].Phenology.FloweringDAS.Value as FloweringDAS
              [Maize].Phenology.MaturityDAS.Value as MaturityDAS
          Manager Harvesting
```csharp
using System;
using Models.Core;
using System.Collections.Generic;
using System.Text;
using Models.Soils;
using Models.PMF;
using Models;
using System.Xml.Serialization;
using APSIM.Shared.Utilities;

namespace Models
{
	[Serializable] 
	public class Script : Model
	{      
		[Link] Plant Maize;          
		[Link] Zone zone;			
					
        
        [EventSubscribe("Commencing")]
        private void OnSimulationCommencing(object sender, EventArgs e)
        {
		}	   
		
		[EventSubscribe("DoManagement")]
		private void OnDoManagement(object sender, EventArgs e)
		{
        if (Maize.Phenology.CurrentPhaseName=="ReadyForHarvesting")
           {
           Maize.Harvest();
           Maize.EndCrop();
           }
		}
		
		[EventSubscribe("DoManagementCalculations")]
		private void OnDoManagementCalculations(object sender, EventArgs e)
		{
			
		}
	}
}
```
    Experiment JMW2Kiboko
      Factors
        Factor Popn: Specifications=[Sowing]
          Operations 11
            1988-04-06  [Maize].Sow(population:1.11, cultivar:"Katumani", depth:50, rowSpacing:750);
          Operations 22
            1988-04-06  [Maize].Sow(population:2.18, cultivar:"Katumani", depth:50, rowSpacing:750);
          Operations 44
            1988-04-06  [Maize].Sow(population:4.31, cultivar:"Katumani", depth:50, rowSpacing:750);
          Operations 66
            1988-04-06  [Maize].Sow(population:6.37, cultivar:"Katumani", depth:50, rowSpacing:750);
          Operations 88
            1988-04-06  [Maize].Sow(population:7.79, cultivar:"Katumani", depth:50, rowSpacing:750);
        Factor Fert: Specifications=[NRate]
          Operations N0
          Operations N120
            1988-04-13  [Fertiliser].Apply(60, Fertiliser.Types.NH4NO3N, 10);
            1988-04-27  [Fertiliser].Apply(60, Fertiliser.Types.NH4NO3N, 10);
      Simulation JMW2Kiboko: Area=0; Slope=0
        Weather: FileName=%root%\Prototypes\Maize\KIBOKO.MET
        Clock: StartDate=1988-01-01; EndDate=1988-10-17
        Summary summaryfile
        SoilArbitrator Soil Arbitrator
        Zone Field: Area=1; Slope=0
          Plant Maize: CropType=Maize
          MicroClimate: same as Africa.JMW2Katumani.JMW2Katumani.Field.MicroClimate
          Irrigation
          Fertiliser
          SurfaceOrganicMatter: PoolName=maize; type=maize; mass=300; standing_fraction=0; cnr=65; CriticalResidueWeight=2000; OptimumDecompTemp=20; MaxCumulativeEOS=20; CNRatioDecompCoeff=0.277; CNRatioDecompThreshold=25; TotalLeachRain=25; MinRainToLeach=10; CriticalMinimumOrganicC=0.004; DefaultCPRatio=0; DefaultStandingFraction=0; StandingExtinctCoeff=0.5; FractionFaecesAdded=0.5
            Pools:
              {PoolName=maize, ResidueType=maize, Mass=300, CNRatio=65, StandingFraction=0}
            ResidueTypes ResidueTypesList: LoadFromResource=ResidueTypes
          Operations Sowing
          Operations NRate
            1985-11-08  [Fertiliser].Apply(50, Fertiliser.Types.NH4NO3N, 10);
            1985-11-29  [Fertiliser].Apply(30, Fertiliser.Types.NH4NO3N, 10);
          Manager ExtraVariables: same as Africa.JMW2Katumani.JMW2Katumani.Field.ExtraVariables
          Arbitrator: ArbitrationMethod=Old; NutrientUptakeMethod=2
          Report: EventNames=[Clock].DoReport
            VariableNames:
              [Clock].Today
              [ExtraVariables].Script.AccumPlantN
              [ExtraVariables].Script.AccumMineralisation
              [ExtraVariables].Script.AccumDenit
              [ExtraVariables].Script.AccumFert
              [ExtraVariables].Script.AccumLeach
              [ExtraVariables].Script.AccumDetach
              [ExtraVariables].Script.DeltaSoilOMN
              [ExtraVariables].Script.DeltaSurfaceOMN
              [ExtraVariables].Script.DeltaSoilMineralN
              [ExtraVariables].Script.SWC
              [ExtraVariables].Script.DUL
              [ExtraVariables].Script.OutFlowLat
              [ExtraVariables].Script.AccumEO
              [ExtraVariables].Script.AccumEP
              [ExtraVariables].Script.AccumES
              [ExtraVariables].Script.AccumDrainage
              [ExtraVariables].Script.AccumRunoff
              [ExtraVariables].Script.AccumRainfall
              [ExtraVariables].Script.AccumIrrigation
              [ExtraVariables].Script.AccumOutflowLat
              [ExtraVariables].Script.SoilWaterDeficit
              [ExtraVariables].Script.SoilNitrogenContent
              [ExtraVariables].Script.FomN
              [ExtraVariables].Script.HumN
              [ExtraVariables].Script.BiomN
              [ExtraVariables].Script.DltNMinRes
              [ExtraVariables].Script.DltNMinTot
              [Soil].SoilWater.SW
              [Soil].SoilWater.Eo
              [Soil].SoilWater.Es
              [Soil].SoilWater.Drainage
              [Soil].SoilWater.Runoff
              [Soil].SoilWater.pond
              sum([Soil].SoilWater.SWmm) as ProfileWater
              [Soil].NO3N
              [MicroClimate].net_radn
              [MicroClimate].peta
              [MicroClimate].petr
              [Maize].Grain.Live.Wt
              [Maize].Stem.Live.Wt
              [Maize].EarLive.Wt
              [Maize].Leaf.Live.Wt
              [Maize].Root.Live.Wt
              [Maize].Husk.Live.Wt
              [Maize].EarLive.N
              [Maize].Grain.Live.N
              [Maize].Stem.Live.N
              [Maize].Leaf.Live.N
              [Maize].Root.Live.N
              [Maize].Root.WaterSupply
              [Maize].Root.WaterUptake
              [Maize].Leaf.Transpiration
              [Maize].Leaf.WaterDemand
              [Maize].Root.Depth
              [Maize].Leaf.CoverTotal
              [Maize].Leaf.CoverDead
              [Maize].Leaf.LAI
              [Maize].Leaf.Height
              [Maize].Leaf.CohortParameters.MaxArea.Value
              [Maize].Leaf.Fw
              [Maize].Leaf.Fn
              [Maize].Phenology.CurrentPhaseName
              [Maize].Phenology.Stage
              [Maize].AboveGroundLive.N
              [Maize].AboveGroundLive.Wt
              [Maize].Total.N
              [Maize].Total.Wt
              [Maize].Arbitrator.NDemand
              [Maize].Phenology.Stage
              [Maize].Leaf.ExpandedCohortNo
              [Maize].Leaf.AppearedCohortNo
              [Maize].Leaf.CohortArea[1:30]
              [ExtraVariables].Script.LeafAppearedPosition
              [ExtraVariables].Script.MostRecentlyAppearedLeafMaxSize
              [ExtraVariables].Script.LeafExpandedPosition
              [ExtraVariables].Script.MostRecentlyExpandedLeafSize
          Soil: Latitude=0; Longitude=0
            Water
              Thickness  BD    AirDry  LL15  DUL   SAT
              100        1.35  0.04    0.13  0.23  0.34
              100        1.35  0.13    0.13  0.23  0.34
              100        1.35  0.13    0.13  0.24  0.35
              200        1.35  0.16    0.16  0.27  0.37
              200        1.35  0.18    0.18  0.28  0.37
              200        1.35  0.18    0.18  0.28  0.37
              200        1.35  0.19    0.19  0.28  0.37
              200        1.35  0.19    0.19  0.28  0.37
              200        1.35  0.18    0.18  0.27  0.37
              SoilCrop MaizeSoil: LL=[0.13, 0.13, 0.13, 0.16, 0.18, 0.18, 0.19, 0.19, 0.18]; KL=[0.08, 0.08, 0.08, 0.08, 0.06, 0.04, 0.03, 0.02, 0.01]; XF=[1, 1, 1, 1, 1, 1, 1, 1, 1]
            SoilWater: residueinterception=0; SummerDate=1-Nov; SummerU=9; SummerCona=3; WinterDate=1-Apr; WinterU=9; WinterCona=3; DiffusConst=88; DiffusSlope=35.4; Salb=0.13; CN2Bare=65; CNRed=20; CNCov=0.8; max_pond=0; Thickness=[100, 100, 100, 200, 200, 200, 200, 200, 200]; SWCON=[0.5, 0.5, 0.5, 0.5, 0.5, 0.5, 0.5, 0.5, 0.5]
            SoilNitrogen: fom_type=[default, manure, mucuna, lablab, shemp, stable]; fract_carb=[0.2, 0.3, 0.54, 0.57, 0.45, 0]; fract_cell=[0.7, 0.3, 0.37, 0.37, 0.47, 0.1]; fract_lign=[0.1, 0.4, 0.09, 0.06, 0.08, 0.9]; wfpsN2N2O_x=[22, 88]; wfpsN2N2O_y=[0.1, 1]
            SoilOrganicMatter: RootCN=45; RootWt=1000; SoilCN=14.5; EnrACoeff=7.4; EnrBCoeff=0.2; OCUnits=Total
              Thickness  OC    FBiom  FInert
              100        0.92  0.02   0.4
              100        1.02  0.015  0.4
              100        0.77  0.01   0.5
              200        0.63  0.01   0.66
              200        0.63  0.01   0.66
              200        0.53  0.01   0.8
              200        0.48  0.01   0.9
              200        0.38  0.01   0.95
              200        0.33  0.01   0.95
            Analysis: Thickness=[100, 100, 100, 200, 200, 200, 200, 200, 200]; PH=[6, 6, 6, 6.2, 6.5, 6.7, 6.8, 6.8, 6.8]; PHUnits=Water; BoronUnits=HotWater
            Sample InitialN: NO3Units=ppm; NH4Units=ppm; SWUnits=Volumetric; OCUnits=Total; PHUnits=Water
              Thickness  NO3  NH4
              100        2.1  0.1
              100        2.9  0.1
              100        2.1  0.1
              200        1.5  0.1
              200        1.9  0.1
              200        1.1  0.1
              200        0.8  0.1
              200        1.1  0.1
              200        1.3  0.1
            Sample InitialSW: Thickness=[100, 100, 100, 200, 200, 200, 200, 200, 200]; SW=[0.12, 0.21, 0.22, 0.26, 0.28, 0.27, 0.25, 0.21, 0.21]; NO3Units=ppm; NH4Units=ppm; SWUnits=Volumetric; OCUnits=Total; PHUnits=Water
          Operations IrrigSchedule
            1985-11-12  [Irrigation].Apply(17.00);
            1988-05-06  [Irrigation].Apply(52.10);
            1988-05-18  [Irrigation].Apply(72.50);
            1988-05-29  [Irrigation].Apply(76.50);
            1988-06-08  [Irrigation].Apply(105.50);
            1988-07-04  [Irrigation].Apply(68.90);
          Report HarvestReport: same as Africa.JMW2Katumani.JMW2Katumani.Field.HarvestReport
          Manager Harvesting: same as Africa.JMW2Katumani.JMW2Katumani.Field.Harvesting
    Experiment BMW1
      Factors
        Factor Treatment1
          Specifications:
            [Operations]
            [soil]
          Operations 1
            1985-10-29  [Maize].Sow(population:2.53, cultivar:"Katumani", depth:50, rowSpacing:750);
            1985-11-08  [Fertiliser].Apply(50, Fertiliser.Types.NH4NO3N, 10);
            1985-11-29  [Fertiliser].Apply(30, Fertiliser.Types.NH4NO3N, 10);
            1985-11-12  [Irrigation].Apply(17.00);
            1985-11-16  [Irrigation].Apply(8.00);
            1985-11-20  [Irrigation].Apply(18.00);
            1985-11-26  [Irrigation].Apply(13.00);
            1985-11-28  [Irrigation].Apply(14.00);
            1985-12-05  [Irrigation].Apply(10.00);
            1985-12-10  [Irrigation].Apply(15.00);
            1985-12-15  [Irrigation].Apply(8.00);
            1985-12-18  [Irrigation].Apply(8.00);
            1985-12-23  [Irrigation].Apply(20.00);
            1986-01-05  [Irrigation].Apply(30.00);
            1986-01-20  [Irrigation].Apply(15.00);
          Soil: Latitude=0; Longitude=0
            Water
              Thickness  BD    AirDry  LL15  DUL   SAT
              100        1.35  0.04    0.14  0.25  0.3
              100        1.35  0.14    0.14  0.25  0.3
              100        1.35  0.15    0.15  0.29  0.32
              200        1.4   0.16    0.16  0.3   0.33
              200        1.4   0.18    0.18  0.3   0.34
              200        1.4   0.18    0.18  0.3   0.35
              200        1.4   0.18    0.18  0.31  0.36
              200        1.4   0.18    0.18  0.32  0.37
              200        1.4   0.18    0.18  0.31  0.37
              SoilCrop MaizeSoil: LL=[0.14, 0.14, 0.15, 0.16, 0.18, 0.18, 0.18, 0.18, 0.18]; KL=[0.08, 0.08, 0.08, 0.08, 0.06, 0.04, 0.03, 0.02, 0.01]; XF=[1, 1, 1, 1, 1, 1, 1, 1, 1]
            SoilWater: residueinterception=0; SummerDate=1-Nov; SummerU=9; SummerCona=2.5; WinterDate=1-Apr; WinterU=9; WinterCona=2.5; DiffusConst=88; DiffusSlope=35.4; Salb=0.13; CN2Bare=65; CNRed=20; CNCov=0.8; max_pond=0; Thickness=[100, 100, 100, 200, 200, 200, 200, 200, 200]; SWCON=[0.5, 0.5, 0.5, 0.5, 0.5, 0.5, 0.5, 0.5, 0.5]
            SoilNitrogen: fom_type=[default, manure, mucuna, lablab, shemp, stable]; fract_carb=[0.2, 0.3, 0.54, 0.57, 0.45, 0]; fract_cell=[0.7, 0.3, 0.37, 0.37, 0.47, 0.1]; fract_lign=[0.1, 0.4, 0.09, 0.06, 0.08, 0.9]; wfpsN2N2O_x=[22, 88]; wfpsN2N2O_y=[0.1, 1]
            SoilOrganicMatter: RootCN=45; RootWt=1000; SoilCN=14.5; EnrACoeff=7.4; EnrBCoeff=0.2; OCUnits=Total
              Thickness  OC    FBiom  FInert
              100        1.15  0.04   0.39
              100        1.04  0.02   0.47
              100        0.74  0.015  0.52
              200        0.56  0.01   0.62
              200        0.4   0.01   0.74
              200        0.49  0.01   0.83
              200        0.49  0.01   0.93
              200        0.49  0.01   0.93
              200        0.49  0.01   0.93
            Analysis: Thickness=[100, 100, 100, 200, 200, 200, 200, 200, 200]; PH=[6, 6, 6, 6.2, 6.5, 6.7, 6.8, 6.8, 6.8]; PHUnits=Water; BoronUnits=HotWater
            Sample InitialN: NO3Units=ppm; NH4Units=ppm; SWUnits=Volumetric; OCUnits=Total; PHUnits=Water
              Thickness  NO3  NH4
              100        15   5
              100        10   2.5
              100        5    1.5
              200        5    1.5
              200        5    1.5
              200        5    1.5
              200        2    1.5
              200        2    1.5
              200        1.5  1.5
            Sample: Thickness=[100, 100, 100, 200, 200, 200, 200, 200, 200]; NO3Units=ppm; NH4Units=ppm; SWUnits=Volumetric; OCUnits=Total; PHUnits=Water
              SW=[0.196, 0.196, 0.234, 0.224, 0.197, 0.199, 0.219, 0.225, 0.234]
        Factor Treatment2
          Specifications:
            [Operations]
            [soil]
          Operations 2
            1985-10-29  [Maize].Sow(population:6.23, cultivar:"Katumani", depth:50, rowSpacing:750);
            1985-11-12  [Irrigation].Apply(17.00);
            1985-11-16  [Irrigation].Apply(8.00);
            1985-11-20  [Irrigation].Apply(18.00);
            1985-11-26  [Irrigation].Apply(13.00);
            1985-11-28  [Irrigation].Apply(14.00);
            1985-12-05  [Irrigation].Apply(10.00);
            1985-12-10  [Irrigation].Apply(15.00);
            1985-12-15  [Irrigation].Apply(8.00);
            1985-12-18  [Irrigation].Apply(8.00);
            1985-12-23  [Irrigation].Apply(20.00);
            1986-01-05  [Irrigation].Apply(30.00);
            1986-01-20  [Irrigation].Apply(15.00);
          Soil: Latitude=0; Longitude=0
            Water
              Thickness  BD    AirDry  LL15  DUL   SAT
              100        1.35  0.04    0.14  0.25  0.3
              100        1.35  0.14    0.14  0.25  0.3
              100        1.35  0.15    0.15  0.29  0.32
              200        1.4   0.16    0.16  0.3   0.33
              200        1.4   0.18    0.18  0.3   0.34
              200        1.4   0.18    0.18  0.3   0.35
              200        1.4   0.18    0.18  0.31  0.36
              200        1.4   0.18    0.18  0.32  0.37
              300        1.4   0.18    0.18  0.31  0.37
              300        1.4   0.18    0.18  0.31  0.37
              SoilCrop MaizeSoil
                LL=[0.14, 0.14, 0.15, 0.16, 0.18, 0.18, 0.18, 0.18, 0.18, 0.18]
                KL=[0.08, 0.08, 0.08, 0.08, 0.06, 0.04, 0.03, 0.02, 0.01, 0.01]
                XF=[1, 1, 1, 1, 1, 1, 1, 1, 1, 1]
            SoilWater: residueinterception=0; SummerDate=1-Nov; SummerU=9; SummerCona=2.5; WinterDate=1-Apr; WinterU=9; WinterCona=2.5; DiffusConst=88; DiffusSlope=35.4; Salb=0.13; CN2Bare=65; CNRed=20; CNCov=0.8; max_pond=0; Thickness=[100, 100, 100, 200, 200, 200, 200, 200, 300, 300]; SWCON=[0.5, 0.5, 0.5, 0.5, 0.5, 0.5, 0.5, 0.5, 0.5, 0.5]
            SoilNitrogen: fom_type=[default, manure, mucuna, lablab, shemp, stable]; fract_carb=[0.2, 0.3, 0.54, 0.57, 0.45, 0]; fract_cell=[0.7, 0.3, 0.37, 0.37, 0.47, 0.1]; fract_lign=[0.1, 0.4, 0.09, 0.06, 0.08, 0.9]; wfpsN2N2O_x=[22, 88]; wfpsN2N2O_y=[0.1, 1]
            SoilOrganicMatter: RootCN=45; RootWt=1000; SoilCN=14.5; EnrACoeff=7.4; EnrBCoeff=0.2; OCUnits=Total
              Thickness  OC    FBiom  FInert
              100        1.15  0.04   0.39
              100        1.04  0.02   0.47
              100        0.74  0.015  0.52
              200        0.56  0.01   0.62
              200        0.4   0.01   0.74
              200        0.49  0.01   0.83
              200        0.49  0.01   0.93
              200        0.49  0.01   0.93
              300        0.49  0.01   0.93
              300        0.49  0.01   0.93
            Analysis: Thickness=[100, 100, 100, 200, 200, 200, 200, 200, 300, 300]; PH=[6, 6, 6, 6.2, 6.5, 6.7, 6.8, 6.8, 6.8, 6.8]; PHUnits=Water; BoronUnits=HotWater
            Sample InitialN: NO3Units=ppm; NH4Units=ppm; SWUnits=Volumetric; OCUnits=Total; PHUnits=Water
              Thickness  NO3  NH4
              100        15   5
              100        10   2.5
              100        5    1.5
              200        5    1.5
              200        5    1.5
              200        5    1.5
              200        2    1.5
              200        2    1.5
              300        1.5  1.5
              300        1.5  1.5
            Sample: Thickness=[100, 100, 100, 200, 200, 200, 200, 200, 300, 300]; NO3Units=ppm; NH4Units=ppm; SWUnits=Volumetric; OCUnits=Total; PHUnits=Water
              SW=[0.17, 0.17, 0.212, 0.208, 0.21, 0.213, 0.229, 0.23, 0.244, 0.233]
        Factor Treatment3
          Specifications:
            [Operations]
            [soil]
          Operations 3
            1985-10-29  [Maize].Sow(population:6.29, cultivar:"Katumani", depth:50, rowSpacing:750);
            1985-11-08  [Fertiliser].Apply(50, Fertiliser.Types.NH4NO3N, 10);
            1985-11-29  [Fertiliser].Apply(30, Fertiliser.Types.NH4NO3N, 10);
            1985-11-12  [Irrigation].Apply(17.00);
            1985-11-16  [Irrigation].Apply(8.00);
            1985-11-20  [Irrigation].Apply(18.00);
            1985-11-26  [Irrigation].Apply(13.00);
            1985-11-28  [Irrigation].Apply(14.00);
            1985-12-05  [Irrigation].Apply(10.00);
            1985-12-10  [Irrigation].Apply(15.00);
            1985-12-15  [Irrigation].Apply(8.00);
            1985-12-18  [Irrigation].Apply(8.00);
            1985-12-23  [Irrigation].Apply(20.00);
            1986-01-05  [Irrigation].Apply(30.00);
            1986-01-20  [Irrigation].Apply(15.00);
          Soil: Latitude=0; Longitude=0
            Water: same as Africa.BMW1.Factors.Treatment1.soil.Water
            SoilWater: same as Africa.BMW1.Factors.Treatment1.soil.SoilWater
            SoilNitrogen: fom_type=[default, manure, mucuna, lablab, shemp, stable]; fract_carb=[0.2, 0.3, 0.54, 0.57, 0.45, 0]; fract_cell=[0.7, 0.3, 0.37, 0.37, 0.47, 0.1]; fract_lign=[0.1, 0.4, 0.09, 0.06, 0.08, 0.9]; wfpsN2N2O_x=[22, 88]; wfpsN2N2O_y=[0.1, 1]
            SoilOrganicMatter: same as Africa.BMW1.Factors.Treatment1.soil.SoilOrganicMatter
            Analysis: Thickness=[100, 100, 100, 200, 200, 200, 200, 200, 200]; PH=[6, 6, 6, 6.2, 6.5, 6.7, 6.8, 6.8, 6.8]; PHUnits=Water; BoronUnits=HotWater
            Sample: NO3Units=ppm; NH4Units=ppm; SWUnits=Volumetric; OCUnits=Total; PHUnits=Water
              Thickness  NO3  NH4
              100        15   5
              100        10   2.5
              100        5    1.5
              200        5    1.5
              200        5    1.5
              200        5    1.5
              200        2    1.5
              200        2    1.5
              200        1.5  1.5
            Sample: Thickness=[100, 100, 100, 200, 200, 200, 200, 200, 200]; NO3Units=ppm; NH4Units=ppm; SWUnits=Volumetric; OCUnits=Total; PHUnits=Water
              SW=[0.17, 0.17, 0.197, 0.204, 0.183, 0.191, 0.196, 0.201, 0.209]
        Factor Treatment4
          Specifications:
            [Operations]
            [soil]
          Operations 4
            1985-10-29  [Maize].Sow(population:2.40, cultivar:"Katumani", depth:50, rowSpacing:750);
            1985-11-12  [Irrigation].Apply(17.00);
            1985-11-16  [Irrigation].Apply(8.00);
            1985-11-20  [Irrigation].Apply(18.00);
            1985-11-26  [Irrigation].Apply(13.00);
            1985-11-28  [Irrigation].Apply(14.00);
            1985-12-05  [Irrigation].Apply(10.00);
            1985-12-10  [Irrigation].Apply(15.00);
            1985-12-15  [Irrigation].Apply(8.00);
            1985-12-18  [Irrigation].Apply(8.00);
            1985-12-23  [Irrigation].Apply(20.00);
            1986-01-05  [Irrigation].Apply(30.00);
            1986-01-20  [Irrigation].Apply(15.00);
          Soil: Latitude=0; Longitude=0
            Water: same as Africa.BMW1.Factors.Treatment1.soil.Water
            SoilWater: same as Africa.BMW1.Factors.Treatment1.soil.SoilWater
            SoilNitrogen: fom_type=[default, manure, mucuna, lablab, shemp, stable]; fract_carb=[0.2, 0.3, 0.54, 0.57, 0.45, 0]; fract_cell=[0.7, 0.3, 0.37, 0.37, 0.47, 0.1]; fract_lign=[0.1, 0.4, 0.09, 0.06, 0.08, 0.9]; wfpsN2N2O_x=[22, 88]; wfpsN2N2O_y=[0.1, 1]
            SoilOrganicMatter: same as Africa.BMW1.Factors.Treatment1.soil.SoilOrganicMatter
            Analysis: Thickness=[100, 100, 100, 200, 200, 200, 200, 200, 200]; PH=[6, 6, 6, 6.2, 6.5, 6.7, 6.8, 6.8, 6.8]; PHUnits=Water; BoronUnits=HotWater
            Sample: NO3Units=ppm; NH4Units=ppm; SWUnits=Volumetric; OCUnits=Total; PHUnits=Water
              Thickness  NO3  NH4
              100        15   5
              100        10   2.5
              100        5    1.5
              200        5    1.5
              200        5    1.5
              200        5    1.5
              200        2    1.5
              200        2    1.5
              200        1.5  1.5
            Sample: Thickness=[100, 100, 100, 200, 200, 200, 200, 200, 200]; NO3Units=ppm; NH4Units=ppm; SWUnits=Volumetric; OCUnits=Total; PHUnits=Water
              SW=[0.256, 0.256, 0.225, 0.203, 0.213, 0.229, 0.243, 0.239, 0.24]
        Factor Treatment5
          Specifications:
            [Operations]
            [soil]
          Operations 5
            1985-10-29  [Maize].Sow(population:6.17, cultivar:"Katumani", depth:50, rowSpacing:750);
            1985-11-08  [Fertiliser].Apply(50, Fertiliser.Types.NH4NO3N, 10);
            1985-11-29  [Fertiliser].Apply(30, Fertiliser.Types.NH4NO3N, 10);
            1985-11-10  [Irrigation].Apply(6.00);
          Soil: Latitude=0; Longitude=0
            Water
              Thickness  BD    AirDry  LL15  DUL   SAT
              100        1.35  0.04    0.14  0.25  0.3
              100        1.35  0.14    0.14  0.25  0.3
              100        1.35  0.15    0.15  0.29  0.32
              200        1.4   0.16    0.16  0.3   0.33
              200        1.4   0.18    0.18  0.3   0.34
              200        1.4   0.18    0.18  0.3   0.35
              200        1.4   0.18    0.18  0.31  0.36
              200        1.4   0.18    0.18  0.32  0.37
              200        1.4   0.18    0.18  0.31  0.37
              200        1.4   0.18    0.18  0.31  0.37
              SoilCrop MaizeSoil
                LL=[0.14, 0.14, 0.15, 0.16, 0.18, 0.18, 0.18, 0.18, 0.18, 0.18]
                KL=[0.08, 0.08, 0.08, 0.08, 0.06, 0.04, 0.03, 0.02, 0.01, 0.01]
                XF=[1, 1, 1, 1, 1, 1, 1, 1, 1, 1]
            SoilWater: residueinterception=0; SummerDate=1-Nov; SummerU=9; SummerCona=2.5; WinterDate=1-Apr; WinterU=9; WinterCona=2.5; DiffusConst=88; DiffusSlope=35.4; Salb=0.13; CN2Bare=65; CNRed=20; CNCov=0.8; max_pond=0; Thickness=[100, 100, 100, 200, 200, 200, 200, 200, 200, 200]; SWCON=[0.5, 0.5, 0.5, 0.5, 0.5, 0.5, 0.5, 0.5, 0.5, 0.5]
            SoilNitrogen: fom_type=[default, manure, mucuna, lablab, shemp, stable]; fract_carb=[0.2, 0.3, 0.54, 0.57, 0.45, 0]; fract_cell=[0.7, 0.3, 0.37, 0.37, 0.47, 0.1]; fract_lign=[0.1, 0.4, 0.09, 0.06, 0.08, 0.9]; wfpsN2N2O_x=[22, 88]; wfpsN2N2O_y=[0.1, 1]
            SoilOrganicMatter: RootCN=45; RootWt=1000; SoilCN=14.5; EnrACoeff=7.4; EnrBCoeff=0.2; OCUnits=Total
              Thickness  OC    FBiom  FInert
              100        1.15  0.04   0.39
              100        1.04  0.02   0.47
              100        0.74  0.015  0.52
              200        0.56  0.01   0.62
              200        0.4   0.01   0.74
              200        0.49  0.01   0.83
              200        0.49  0.01   0.93
              200        0.49  0.01   0.93
              200        0.49  0.01   0.93
              200        0.49  0.01   0.93
            Analysis: Thickness=[100, 100, 100, 200, 200, 200, 200, 200, 200, 200]; PH=[6, 6, 6, 6.2, 6.5, 6.7, 6.8, 6.8, 6.8, 6.8]; PHUnits=Water; BoronUnits=HotWater
            Sample: NO3Units=ppm; NH4Units=ppm; SWUnits=Volumetric; OCUnits=Total; PHUnits=Water
              Thickness  NO3  NH4
              100        15   5
              100        10   2.5
              100        5    1.5
              200        5    1.5
              200        5    1.5
              200        5    1.5
              200        2    1.5
              200        2    1.5
              200        1.5  1.5
              200        1.5  1.5
            Sample: Thickness=[100, 100, 100, 200, 200, 200, 200, 200, 200, 200]; NO3Units=ppm; NH4Units=ppm; SWUnits=Volumetric; OCUnits=Total; PHUnits=Water
              SW=[0.164, 0.164, 0.21, 0.168, 0.189, 0.186, 0.194, 0.191, 0.197, 0.196]
        Factor Treatment6
          Specifications:
            [Operations]
            [soil]
          Operations 6
            1985-10-29  [Maize].Sow(population:2.09, cultivar:"Katumani", depth:50, rowSpacing:750);
            1985-11-08  [Fertiliser].Apply(50, Fertiliser.Types.NH4NO3N, 10);
            1985-11-29  [Fertiliser].Apply(30, Fertiliser.Types.NH4NO3N, 10);
            1985-11-10  [Irrigation].Apply(6.00);
          Soil: Latitude=0; Longitude=0
            Water: same as Africa.BMW1.Factors.Treatment2.soil.Water
            SoilWater: same as Africa.BMW1.Factors.Treatment2.soil.SoilWater
            SoilNitrogen: fom_type=[default, manure, mucuna, lablab, shemp, stable]; fract_carb=[0.2, 0.3, 0.54, 0.57, 0.45, 0]; fract_cell=[0.7, 0.3, 0.37, 0.37, 0.47, 0.1]; fract_lign=[0.1, 0.4, 0.09, 0.06, 0.08, 0.9]; wfpsN2N2O_x=[22, 88]; wfpsN2N2O_y=[0.1, 1]
            SoilOrganicMatter: same as Africa.BMW1.Factors.Treatment2.soil.SoilOrganicMatter
            Analysis: Thickness=[100, 100, 100, 200, 200, 200, 200, 200, 300, 300]; PH=[6, 6, 6, 6.2, 6.5, 6.7, 6.8, 6.8, 6.8, 6.8]; PHUnits=Water; BoronUnits=HotWater
            Sample: NO3Units=ppm; NH4Units=ppm; SWUnits=Volumetric; OCUnits=Total; PHUnits=Water
              Thickness  NO3  NH4
              100        15   5
              100        10   2.5
              100        5    1.5
              200        5    1.5
              200        5    1.5
              200        5    1.5
              200        2    1.5
              200        2    1.5
              300        1.5  1.5
              300        1.5  1.5
            Sample: Thickness=[100, 100, 100, 200, 200, 200, 200, 200, 300, 300]; NO3Units=ppm; NH4Units=ppm; SWUnits=Volumetric; OCUnits=Total; PHUnits=Water
              SW=[0.179, 0.179, 0.198, 0.188, 0.187, 0.19, 0.196, 0.213, 0.22, 0.204]
        Factor Treatment7
          Specifications:
            [Operations]
            [soil]
          Operations 7
            1985-10-29  [Maize].Sow(population:2.34, cultivar:"Katumani", depth:50, rowSpacing:750);
            1985-11-10  [Irrigation].Apply(6.00);
          Soil: Latitude=0; Longitude=0
            Water: same as Africa.BMW1.Factors.Treatment5.soil.Water
            SoilWater: same as Africa.BMW1.Factors.Treatment5.soil.SoilWater
            SoilNitrogen: fom_type=[default, manure, mucuna, lablab, shemp, stable]; fract_carb=[0.2, 0.3, 0.54, 0.57, 0.45, 0]; fract_cell=[0.7, 0.3, 0.37, 0.37, 0.47, 0.1]; fract_lign=[0.1, 0.4, 0.09, 0.06, 0.08, 0.9]; wfpsN2N2O_x=[22, 88]; wfpsN2N2O_y=[0.1, 1]
            SoilOrganicMatter: same as Africa.BMW1.Factors.Treatment5.soil.SoilOrganicMatter
            Analysis: Thickness=[100, 100, 100, 200, 200, 200, 200, 200, 200, 200]; PH=[6, 6, 6, 6.2, 6.5, 6.7, 6.8, 6.8, 6.8, 6.8]; PHUnits=Water; BoronUnits=HotWater
            Sample: NO3Units=ppm; NH4Units=ppm; SWUnits=Volumetric; OCUnits=Total; PHUnits=Water
              Thickness  NO3  NH4
              100        15   5
              100        10   2.5
              100        5    1.5
              200        5    1.5
              200        5    1.5
              200        5    1.5
              200        2    1.5
              200        2    1.5
              200        1.5  1.5
              200        1.5  1.5
            Sample: Thickness=[100, 100, 100, 200, 200, 200, 200, 200, 200, 200]; NO3Units=ppm; NH4Units=ppm; SWUnits=Volumetric; OCUnits=Total; PHUnits=Water
              SW=[0.155, 0.155, 0.213, 0.243, 0.212, 0.2, 0.215, 0.236, 0.247, 0.247]
        Factor Treatment8
          Specifications:
            [Operations]
            [soil]
          Operations 8
            1985-10-29  [Maize].Sow(population:6.04, cultivar:"Katumani", depth:50, rowSpacing:750);
            1985-11-10  [Irrigation].Apply(6.00);
          Soil: Latitude=0; Longitude=0
            Water
              Thickness  BD    AirDry  LL15  DUL   SAT
              100        1.35  0.04    0.14  0.25  0.3
              100        1.35  0.14    0.14  0.25  0.3
              100        1.35  0.15    0.15  0.29  0.32
              200        1.4   0.16    0.16  0.3   0.33
              200        1.4   0.18    0.18  0.3   0.34
              200        1.4   0.18    0.18  0.3   0.35
              200        1.4   0.18    0.18  0.31  0.36
              200        1.4   0.18    0.18  0.32  0.37
              SoilCrop MaizeSoil: LL=[0.14, 0.14, 0.15, 0.16, 0.18, 0.18, 0.18, 0.18]; KL=[0.08, 0.08, 0.08, 0.08, 0.06, 0.04, 0.03, 0.02]; XF=[1, 1, 1, 1, 1, 1, 1, 1]
            SoilWater: residueinterception=0; SummerDate=1-Nov; SummerU=9; SummerCona=2.5; WinterDate=1-Apr; WinterU=9; WinterCona=2.5; DiffusConst=88; DiffusSlope=35.4; Salb=0.13; CN2Bare=65; CNRed=20; CNCov=0.8; max_pond=0; Thickness=[100, 100, 100, 200, 200, 200, 200, 200]; SWCON=[0.5, 0.5, 0.5, 0.5, 0.5, 0.5, 0.5, 0.5]
            SoilNitrogen: fom_type=[default, manure, mucuna, lablab, shemp, stable]; fract_carb=[0.2, 0.3, 0.54, 0.57, 0.45, 0]; fract_cell=[0.7, 0.3, 0.37, 0.37, 0.47, 0.1]; fract_lign=[0.1, 0.4, 0.09, 0.06, 0.08, 0.9]; wfpsN2N2O_x=[22, 88]; wfpsN2N2O_y=[0.1, 1]
            SoilOrganicMatter: RootCN=45; RootWt=1000; SoilCN=14.5; EnrACoeff=7.4; EnrBCoeff=0.2; OCUnits=Total
              Thickness  OC    FBiom  FInert
              100        1.15  0.04   0.39
              100        1.04  0.02   0.47
              100        0.74  0.015  0.52
              200        0.56  0.01   0.62
              200        0.4   0.01   0.74
              200        0.49  0.01   0.83
              200        0.49  0.01   0.93
              200        0.49  0.01   0.93
            Analysis: Thickness=[100, 100, 100, 200, 200, 200, 200, 200]; PH=[6, 6, 6, 6.2, 6.5, 6.7, 6.8, 6.8]; PHUnits=Water; BoronUnits=HotWater
            Sample: NO3Units=ppm; NH4Units=ppm; SWUnits=Volumetric; OCUnits=Total; PHUnits=Water
              Thickness  NO3  NH4
              100        15   5
              100        10   2.5
              100        5    1.5
              200        5    1.5
              200        5    1.5
              200        5    1.5
              200        2    1.5
              200        2    1.5
            Sample: Thickness=[100, 100, 100, 200, 200, 200, 200, 200]; SW=[0.208, 0.208, 0.215, 0.184, 0.211, 0.226, 0.228, 0.22]; NO3Units=ppm; NH4Units=ppm; SWUnits=Volumetric; OCUnits=Total; PHUnits=Water
        Factor Treatment9
          Specifications:
            [Operations]
            [soil]
          Operations 9
            1985-11-14  [Maize].Sow(population:2.16, cultivar:"Katumani", depth:50, rowSpacing:750);
            1985-11-29  [Fertiliser].Apply(50, Fertiliser.Types.NH4NO3N, 10);
            1985-12-23  [Fertiliser].Apply(30, Fertiliser.Types.NH4NO3N, 10);
            1985-11-10  [Irrigation].Apply(6.00);
          Soil: Latitude=0; Longitude=0
            Water: same as Africa.BMW1.Factors.Treatment2.soil.Water
            SoilWater: same as Africa.BMW1.Factors.Treatment2.soil.SoilWater
            SoilNitrogen: fom_type=[default, manure, mucuna, lablab, shemp, stable]; fract_carb=[0.2, 0.3, 0.54, 0.57, 0.45, 0]; fract_cell=[0.7, 0.3, 0.37, 0.37, 0.47, 0.1]; fract_lign=[0.1, 0.4, 0.09, 0.06, 0.08, 0.9]; wfpsN2N2O_x=[22, 88]; wfpsN2N2O_y=[0.1, 1]
            SoilOrganicMatter: same as Africa.BMW1.Factors.Treatment2.soil.SoilOrganicMatter
            Analysis: Thickness=[100, 100, 100, 200, 200, 200, 200, 200, 300, 300]; PH=[6, 6, 6, 6.2, 6.5, 6.7, 6.8, 6.8, 6.8, 6.8]; PHUnits=Water; BoronUnits=HotWater
            Sample: NO3Units=ppm; NH4Units=ppm; SWUnits=Volumetric; OCUnits=Total; PHUnits=Water
              Thickness  NO3  NH4
              100        15   5
              100        10   2.5
              100        5    1.5
              200        5    1.5
              200        5    1.5
              200        5    1.5
              200        2    1.5
              200        2    1.5
              300        1.5  1.5
              300        1.5  1.5
            Sample: Thickness=[100, 100, 100, 200, 200, 200, 200, 200, 300, 300]; NO3Units=ppm; NH4Units=ppm; SWUnits=Volumetric; OCUnits=Total; PHUnits=Water
              SW=[0.183, 0.183, 0.254, 0.232, 0.216, 0.201, 0.21, 0.228, 0.231, 0.226]
        Factor Treatment10
          Specifications:
            [Operations]
            [soil]
          Operations 10
            1985-11-21  [Maize].Sow(population:6.23, cultivar:"Katumani", depth:50, rowSpacing:750);
            1985-11-10  [Irrigation].Apply(6.00);
          Soil: Latitude=0; Longitude=0
            Water: same as Africa.BMW1.Factors.Treatment8.soil.Water
            SoilWater: same as Africa.BMW1.Factors.Treatment8.soil.SoilWater
            SoilNitrogen: fom_type=[default, manure, mucuna, lablab, shemp, stable]; fract_carb=[0.2, 0.3, 0.54, 0.57, 0.45, 0]; fract_cell=[0.7, 0.3, 0.37, 0.37, 0.47, 0.1]; fract_lign=[0.1, 0.4, 0.09, 0.06, 0.08, 0.9]; wfpsN2N2O_x=[22, 88]; wfpsN2N2O_y=[0.1, 1]
            SoilOrganicMatter: same as Africa.BMW1.Factors.Treatment8.soil.SoilOrganicMatter
            Analysis: Thickness=[100, 100, 100, 200, 200, 200, 200, 200]; PH=[6, 6, 6, 6.2, 6.5, 6.7, 6.8, 6.8]; PHUnits=Water; BoronUnits=HotWater
            Sample InitialN: NO3Units=ppm; NH4Units=ppm; SWUnits=Volumetric; OCUnits=Total; PHUnits=Water
              Thickness  NO3  NH4
              100        15   5
              100        10   2.5
              100        5    1.5
              200        5    1.5
              200        5    1.5
              200        5    1.5
              200        2    1.5
              200        2    1.5
            Sample: Thickness=[100, 100, 100, 200, 200, 200, 200, 200]; SW=[0.151, 0.151, 0.196, 0.193, 0.194, 0.192, 0.192, 0.209]; NO3Units=ppm; NH4Units=ppm; SWUnits=Volumetric; OCUnits=Total; PHUnits=Water
        Factor Treatment11
          Specifications:
            [Operations]
            [soil]
          Operations 11
            1985-11-21  [Maize].Sow(population:6.23, cultivar:"Katumani", depth:50, rowSpacing:750);
            1985-11-10  [Irrigation].Apply(6.00);
          Soil: Latitude=0; Longitude=0
            Water
              Thickness  BD    AirDry  LL15  DUL   SAT
              100        1.35  0.04    0.14  0.25  0.3
              100        1.35  0.14    0.14  0.25  0.3
              100        1.35  0.14    0.15  0.29  0.32
              200        1.4   0.14    0.16  0.3   0.33
              200        1.4   0.17    0.18  0.3   0.34
              200        1.4   0.17    0.18  0.3   0.35
              200        1.4   0.18    0.18  0.31  0.36
              200        1.4   0.18    0.18  0.32  0.37
              300        1.4   0.18    0.18  0.32  0.37
              SoilCrop MaizeSoil: LL=[0.14, 0.14, 0.15, 0.16, 0.18, 0.18, 0.18, 0.18, 0.18]; KL=[0.08, 0.08, 0.08, 0.08, 0.06, 0.04, 0.03, 0.02, 0.01]; XF=[1, 1, 1, 1, 1, 1, 1, 1, 1]
            SoilWater: residueinterception=0; SummerDate=1-Nov; SummerU=9; SummerCona=2.5; WinterDate=1-Apr; WinterU=9; WinterCona=2.5; DiffusConst=88; DiffusSlope=35.4; Salb=0.13; CN2Bare=65; CNRed=20; CNCov=0.8; max_pond=0; Thickness=[100, 100, 100, 200, 200, 200, 200, 200, 300]; SWCON=[0.5, 0.5, 0.5, 0.5, 0.5, 0.5, 0.5, 0.5, 0.5]
            SoilNitrogen: fom_type=[default, manure, mucuna, lablab, shemp, stable]; fract_carb=[0.2, 0.3, 0.54, 0.57, 0.45, 0]; fract_cell=[0.7, 0.3, 0.37, 0.37, 0.47, 0.1]; fract_lign=[0.1, 0.4, 0.09, 0.06, 0.08, 0.9]; wfpsN2N2O_x=[22, 88]; wfpsN2N2O_y=[0.1, 1]
            SoilOrganicMatter: RootCN=45; RootWt=1000; SoilCN=14.5; EnrACoeff=7.4; EnrBCoeff=0.2; OCUnits=Total
              Thickness  OC    FBiom  FInert
              100        1.15  0.04   0.39
              100        1.04  0.02   0.47
              100        0.74  0.015  0.52
              200        0.56  0.01   0.62
              200        0.4   0.01   0.74
              200        0.49  0.01   0.83
              200        0.49  0.01   0.93
              200        0.49  0.01   0.93
              300        0.49  0.01   0.93
            Analysis: Thickness=[100, 100, 100, 200, 200, 200, 200, 200, 300]; PH=[6, 6, 6, 6.2, 6.5, 6.7, 6.8, 6.8, 6.8]; PHUnits=Water; BoronUnits=HotWater
            Sample: NO3Units=ppm; NH4Units=ppm; SWUnits=Volumetric; OCUnits=Total; PHUnits=Water
              Thickness  NO3  NH4
              100        15   5
              100        10   2.5
              100        5    1.5
              200        5    1.5
              200        5    1.5
              200        5    1.5
              200        2    1.5
              200        2    1.5
              300        2    1.5
            Sample InitialSW: Thickness=[100, 100, 100, 200, 200, 200, 200, 200, 300]; NO3Units=ppm; NH4Units=ppm; SWUnits=Volumetric; OCUnits=Total; PHUnits=Water
              SW=[0.146, 0.146, 0.147, 0.158, 0.177, 0.177, 0.187, 0.202, 0.225]
        Factor Treatment12
          Specifications:
            [Operations]
            [soil]
          Operations 12
            1985-11-14  [Maize].Sow(population:2.09, cultivar:"Katumani", depth:50, rowSpacing:750);
            1985-11-10  [Irrigation].Apply(6.00);
          Soil: Latitude=0; Longitude=0
            Water: same as Africa.BMW1.Factors.Treatment8.soil.Water
            SoilWater: same as Africa.BMW1.Factors.Treatment8.soil.SoilWater
            SoilNitrogen: fom_type=[default, manure, mucuna, lablab, shemp, stable]; fract_carb=[0.2, 0.3, 0.54, 0.57, 0.45, 0]; fract_cell=[0.7, 0.3, 0.37, 0.37, 0.47, 0.1]; fract_lign=[0.1, 0.4, 0.09, 0.06, 0.08, 0.9]; wfpsN2N2O_x=[22, 88]; wfpsN2N2O_y=[0.1, 1]
            SoilOrganicMatter: same as Africa.BMW1.Factors.Treatment8.soil.SoilOrganicMatter
            Analysis: Thickness=[100, 100, 100, 200, 200, 200, 200, 200]; PH=[6, 6, 6, 6.2, 6.5, 6.7, 6.8, 6.8]; PHUnits=Water; BoronUnits=HotWater
            Sample: NO3Units=ppm; NH4Units=ppm; SWUnits=Volumetric; OCUnits=Total; PHUnits=Water
              Thickness  NO3  NH4
              100        15   5
              100        10   2.5
              100        5    1.5
              200        5    1.5
              200        5    1.5
              200        5    1.5
              200        2    1.5
              200        2    1.5
            Sample InitialSW: Thickness=[100, 100, 100, 200, 200, 200, 200, 200]; SW=[0.164, 0.164, 0.189, 0.173, 0.186, 0.202, 0.221, 0.208]; NO3Units=ppm; NH4Units=ppm; SWUnits=Volumetric; OCUnits=Total; PHUnits=Water
        Factor Treatment13
          Specifications:
            [Operations]
            [soil]
          Operations 13
            1985-10-29  [Maize].Sow(population:2.16, cultivar:"Katumani", depth:50, rowSpacing:750);
            1985-11-10  [Irrigation].Apply(6.00);
          Soil: Latitude=0; Longitude=0
            Water: same as Africa.BMW1.Factors.Treatment2.soil.Water
            SoilWater: same as Africa.BMW1.Factors.Treatment2.soil.SoilWater
            SoilNitrogen: fom_type=[default, manure, mucuna, lablab, shemp, stable]; fract_carb=[0.2, 0.3, 0.54, 0.57, 0.45, 0]; fract_cell=[0.7, 0.3, 0.37, 0.37, 0.47, 0.1]; fract_lign=[0.1, 0.4, 0.09, 0.06, 0.08, 0.9]; wfpsN2N2O_x=[22, 88]; wfpsN2N2O_y=[0.1, 1]
            SoilOrganicMatter: same as Africa.BMW1.Factors.Treatment2.soil.SoilOrganicMatter
            Analysis: Thickness=[100, 100, 100, 200, 200, 200, 200, 200, 300, 300]; PH=[6, 6, 6, 6.2, 6.5, 6.7, 6.8, 6.8, 6.8, 6.8]; PHUnits=Water; BoronUnits=HotWater
            Sample: NO3Units=ppm; NH4Units=ppm; SWUnits=Volumetric; OCUnits=Total; PHUnits=Water
              Thickness  NO3  NH4
              100        15   5
              100        10   2.5
              100        5    1.5
              200        5    1.5
              200        5    1.5
              200        5    1.5
              200        2    1.5
              200        2    1.5
              300        1.5  1.5
              300        1.5  1.5
            Sample InitialSW: Thickness=[100, 100, 100, 200, 200, 200, 200, 200, 300, 300]; NO3Units=ppm; NH4Units=ppm; SWUnits=Volumetric; OCUnits=Total; PHUnits=Water
              SW=[0.157, 0.157, 0.181, 0.219, 0.21, 0.221, 0.228, 0.24, 0.236, 0.224]
        Factor Treatment14
          Specifications:
            [Operations]
            [soil]
          Operations 14
            1985-10-29  [Maize].Sow(population:5.3, cultivar:"Katumani", depth:50, rowSpacing:750);
            1985-11-10  [Irrigation].Apply(6.00);
          Soil: Latitude=0; Longitude=0
            Water
              Thickness  BD    AirDry  LL15  DUL   SAT
              100        1.35  0.04    0.14  0.25  0.3
              100        1.35  0.14    0.14  0.25  0.3
              100        1.35  0.15    0.15  0.29  0.32
              200        1.4   0.16    0.16  0.3   0.33
              200        1.4   0.18    0.18  0.3   0.34
              200        1.4   0.18    0.18  0.3   0.35
              200        1.4   0.18    0.18  0.31  0.36
              200        1.4   0.18    0.18  0.32  0.37
              200        1.4   0.18    0.18  0.31  0.37
              200        1.4   0.18    0.18  0.32  0.37
              SoilCrop MaizeSoil
                LL=[0.14, 0.14, 0.15, 0.16, 0.18, 0.18, 0.18, 0.18, 0.18, 0.18]
                KL=[0.08, 0.08, 0.08, 0.08, 0.06, 0.04, 0.03, 0.02, 0.01, 0.01]
                XF=[1, 1, 1, 1, 1, 1, 1, 1, 1, 1]
            SoilWater: same as Africa.BMW1.Factors.Treatment5.soil.SoilWater
            SoilNitrogen: fom_type=[default, manure, mucuna, lablab, shemp, stable]; fract_carb=[0.2, 0.3, 0.54, 0.57, 0.45, 0]; fract_cell=[0.7, 0.3, 0.37, 0.37, 0.47, 0.1]; fract_lign=[0.1, 0.4, 0.09, 0.06, 0.08, 0.9]; wfpsN2N2O_x=[22, 88]; wfpsN2N2O_y=[0.1, 1]
            SoilOrganicMatter: same as Africa.BMW1.Factors.Treatment5.soil.SoilOrganicMatter
            Analysis: Thickness=[100, 100, 100, 200, 200, 200, 200, 200, 200, 200]; PH=[6, 6, 6, 6.2, 6.5, 6.7, 6.8, 6.8, 6.8, 6.8]; PHUnits=Water; BoronUnits=HotWater
            Sample: NO3Units=ppm; NH4Units=ppm; SWUnits=Volumetric; OCUnits=Total; PHUnits=Water
              Thickness  NO3  NH4
              100        15   5
              100        10   2.5
              100        5    1.5
              200        5    1.5
              200        5    1.5
              200        5    1.5
              200        2    1.5
              200        2    1.5
              200        1.5  1.5
              200        2    1.5
            Sample InitialSW: Thickness=[100, 100, 100, 200, 200, 200, 200, 200, 200, 200]; NO3Units=ppm; NH4Units=ppm; SWUnits=Volumetric; OCUnits=Total; PHUnits=Water
              SW=[0.227, 0.227, 0.188, 0.181, 0.183, 0.189, 0.18, 0.185, 0.206, 0.201]
        Factor Treatment15
          Specifications:
            [Operations]
            [soil]
          Operations 15
            1985-10-29  [Maize].Sow(population:2.16, cultivar:"Katumani", depth:50, rowSpacing:750);
            1985-11-08  [Fertiliser].Apply(50, Fertiliser.Types.NH4NO3N, 10);
            1985-11-29  [Fertiliser].Apply(30, Fertiliser.Types.NH4NO3N, 10);
            1985-11-10  [Irrigation].Apply(6.00);
          Soil: Latitude=0; Longitude=0
            Water: same as Africa.BMW1.Factors.Treatment2.soil.Water
            SoilWater: same as Africa.BMW1.Factors.Treatment2.soil.SoilWater
            SoilNitrogen: fom_type=[default, manure, mucuna, lablab, shemp, stable]; fract_carb=[0.2, 0.3, 0.54, 0.57, 0.45, 0]; fract_cell=[0.7, 0.3, 0.37, 0.37, 0.47, 0.1]; fract_lign=[0.1, 0.4, 0.09, 0.06, 0.08, 0.9]; wfpsN2N2O_x=[22, 88]; wfpsN2N2O_y=[0.1, 1]
            SoilOrganicMatter: same as Africa.BMW1.Factors.Treatment2.soil.SoilOrganicMatter
            Analysis: Thickness=[100, 100, 100, 200, 200, 200, 200, 200, 300, 300]; PH=[6, 6, 6, 6.2, 6.5, 6.7, 6.8, 6.8, 6.8, 6.8]; PHUnits=Water; BoronUnits=HotWater
            Sample: NO3Units=ppm; NH4Units=ppm; SWUnits=Volumetric; OCUnits=Total; PHUnits=Water
              Thickness  NO3  NH4
              100        15   5
              100        10   2.5
              100        5    1.5
              200        5    1.5
              200        5    1.5
              200        5    1.5
              200        2    1.5
              200        2    1.5
              300        1.5  1.5
              300        1.5  1.5
            Sample InitialSW: Thickness=[100, 100, 100, 200, 200, 200, 200, 200, 300, 300]; NO3Units=ppm; NH4Units=ppm; SWUnits=Volumetric; OCUnits=Total; PHUnits=Water
              SW=[0.181, 0.181, 0.199, 0.214, 0.239, 0.207, 0.234, 0.231, 0.252, 0.272]
        Factor Treatment16
          Specifications:
            [Operations]
            [soil]
          Operations 16
            1985-10-29  [Maize].Sow(population:6.48, cultivar:"Katumani", depth:50, rowSpacing:750);
            1985-11-08  [Fertiliser].Apply(50, Fertiliser.Types.NH4NO3N, 10);
            1985-11-29  [Fertiliser].Apply(30, Fertiliser.Types.NH4NO3N, 10);
            1985-11-10  [Irrigation].Apply(6.00);
          Soil: Latitude=0; Longitude=0
            Water: same as Africa.BMW1.Factors.Treatment1.soil.Water
            SoilWater: same as Africa.BMW1.Factors.Treatment1.soil.SoilWater
            SoilNitrogen: fom_type=[default, manure, mucuna, lablab, shemp, stable]; fract_carb=[0.2, 0.3, 0.54, 0.57, 0.45, 0]; fract_cell=[0.7, 0.3, 0.37, 0.37, 0.47, 0.1]; fract_lign=[0.1, 0.4, 0.09, 0.06, 0.08, 0.9]; wfpsN2N2O_x=[22, 88]; wfpsN2N2O_y=[0.1, 1]
            SoilOrganicMatter: same as Africa.BMW1.Factors.Treatment1.soil.SoilOrganicMatter
            Analysis: Thickness=[100, 100, 100, 200, 200, 200, 200, 200, 200]; PH=[6, 6, 6, 6.2, 6.5, 6.7, 6.8, 6.8, 6.8]; PHUnits=Water; BoronUnits=HotWater
            Sample: NO3Units=ppm; NH4Units=ppm; SWUnits=Volumetric; OCUnits=Total; PHUnits=Water
              Thickness  NO3  NH4
              100        15   5
              100        10   2.5
              100        5    1.5
              200        5    1.5
              200        5    1.5
              200        5    1.5
              200        2    1.5
              200        2    1.5
              200        1.5  1.5
            Sample InitialSW: Thickness=[100, 100, 100, 200, 200, 200, 200, 200, 200]; NO3Units=ppm; NH4Units=ppm; SWUnits=Volumetric; OCUnits=Total; PHUnits=Water
              SW=[0.183, 0.183, 0.23, 0.232, 0.216, 0.205, 0.209, 0.188, 0.201]
        Factor Treatment17
          Specifications:
            [Operations]
            [soil]
          Operations 17
            1985-11-14  [Maize].Sow(population:4.25, cultivar:"Katumani", depth:50, rowSpacing:750);
            1985-11-08  [Fertiliser].Apply(50, Fertiliser.Types.NH4NO3N, 10);
            1985-11-29  [Fertiliser].Apply(30, Fertiliser.Types.NH4NO3N, 10);
            1985-11-10  [Irrigation].Apply(6.00);
          Soil: Latitude=0; Longitude=0
            Water: same as Africa.BMW1.Factors.Treatment5.soil.Water
            SoilWater: same as Africa.BMW1.Factors.Treatment5.soil.SoilWater
            SoilNitrogen: fom_type=[default, manure, mucuna, lablab, shemp, stable]; fract_carb=[0.2, 0.3, 0.54, 0.57, 0.45, 0]; fract_cell=[0.7, 0.3, 0.37, 0.37, 0.47, 0.1]; fract_lign=[0.1, 0.4, 0.09, 0.06, 0.08, 0.9]; wfpsN2N2O_x=[22, 88]; wfpsN2N2O_y=[0.1, 1]
            SoilOrganicMatter: same as Africa.BMW1.Factors.Treatment5.soil.SoilOrganicMatter
            Analysis: Thickness=[100, 100, 100, 200, 200, 200, 200, 200, 200, 200]; PH=[6, 6, 6, 6.2, 6.5, 6.7, 6.8, 6.8, 6.8, 6.8]; PHUnits=Water; BoronUnits=HotWater
            Sample: NO3Units=ppm; NH4Units=ppm; SWUnits=Volumetric; OCUnits=Total; PHUnits=Water
              Thickness  NO3  NH4
              100        15   5
              100        10   2.5
              100        5    1.5
              200        5    1.5
              200        5    1.5
              200        5    1.5
              200        2    1.5
              200        2    1.5
              200        1.5  1.5
              200        1.5  1.5
            Sample InitialSW: Thickness=[100, 100, 100, 200, 200, 200, 200, 200, 200, 200]; NO3Units=ppm; NH4Units=ppm; SWUnits=Volumetric; OCUnits=Total; PHUnits=Water
              SW=[0.233, 0.233, 0.268, 0.232, 0.229, 0.216, 0.22, 0.221, 0.209, 0.194]
        Factor Treatment18
          Specifications:
            [Operations]
            [soil]
          Operations 18
            1985-11-14  [Maize].Sow(population:2.03, cultivar:"Katumani", depth:50, rowSpacing:750);
            1985-11-10  [Irrigation].Apply(6.00);
          Soil: Latitude=0; Longitude=0
            Water: same as Africa.BMW1.Factors.Treatment8.soil.Water
            SoilWater: same as Africa.BMW1.Factors.Treatment8.soil.SoilWater
            SoilNitrogen: fom_type=[default, manure, mucuna, lablab, shemp, stable]; fract_carb=[0.2, 0.3, 0.54, 0.57, 0.45, 0]; fract_cell=[0.7, 0.3, 0.37, 0.37, 0.47, 0.1]; fract_lign=[0.1, 0.4, 0.09, 0.06, 0.08, 0.9]; wfpsN2N2O_x=[22, 88]; wfpsN2N2O_y=[0.1, 1]
            SoilOrganicMatter: same as Africa.BMW1.Factors.Treatment8.soil.SoilOrganicMatter
            Analysis: Thickness=[100, 100, 100, 200, 200, 200, 200, 200]; PH=[6, 6, 6, 6.2, 6.5, 6.7, 6.8, 6.8]; PHUnits=Water; BoronUnits=HotWater
            Sample: NO3Units=ppm; NH4Units=ppm; SWUnits=Volumetric; OCUnits=Total; PHUnits=Water
              Thickness  NO3  NH4
              100        15   5
              100        10   2.5
              100        5    1.5
              200        5    1.5
              200        5    1.5
              200        5    1.5
              200        2    1.5
              200        2    1.5
            Sample InitialSW: Thickness=[100, 100, 100, 200, 200, 200, 200, 200]; SW=[0.199, 0.199, 0.209, 0.213, 0.201, 0.205, 0.214, 0.232]; NO3Units=ppm; NH4Units=ppm; SWUnits=Volumetric; OCUnits=Total; PHUnits=Water
        Factor Treatment19
          Specifications:
            [Operations]
            [soil]
          Operations 19
            1985-11-14  [Maize].Sow(population:2.22, cultivar:"Katumani", depth:50, rowSpacing:750);
            1985-11-08  [Fertiliser].Apply(50, Fertiliser.Types.NH4NO3N, 10);
            1985-11-29  [Fertiliser].Apply(30, Fertiliser.Types.NH4NO3N, 10);
            1985-11-10  [Irrigation].Apply(6.00);
          Soil: Latitude=0; Longitude=0
            Water
              Thickness  BD    AirDry  LL15  DUL   SAT
              100        1.35  0.04    0.14  0.25  0.3
              100        1.35  0.14    0.14  0.25  0.3
              100        1.35  0.15    0.15  0.29  0.32
              200        1.4   0.16    0.16  0.3   0.33
              200        1.4   0.18    0.18  0.3   0.34
              200        1.4   0.18    0.18  0.3   0.35
              200        1.4   0.18    0.18  0.31  0.36
              SoilCrop MaizeSoil: LL=[0.14, 0.14, 0.15, 0.16, 0.18, 0.18, 0.18]; KL=[0.08, 0.08, 0.08, 0.08, 0.06, 0.04, 0.03]; XF=[1, 1, 1, 1, 1, 1, 1]
            SoilWater: residueinterception=0; SummerDate=1-Nov; SummerU=9; SummerCona=2.5; WinterDate=1-Apr; WinterU=9; WinterCona=2.5; DiffusConst=88; DiffusSlope=35.4; Salb=0.13; CN2Bare=65; CNRed=20; CNCov=0.8; max_pond=0; Thickness=[100, 100, 100, 200, 200, 200, 200]; SWCON=[0.5, 0.5, 0.5, 0.5, 0.5, 0.5, 0.5]
            SoilNitrogen: fom_type=[default, manure, mucuna, lablab, shemp, stable]; fract_carb=[0.2, 0.3, 0.54, 0.57, 0.45, 0]; fract_cell=[0.7, 0.3, 0.37, 0.37, 0.47, 0.1]; fract_lign=[0.1, 0.4, 0.09, 0.06, 0.08, 0.9]; wfpsN2N2O_x=[22, 88]; wfpsN2N2O_y=[0.1, 1]
            SoilOrganicMatter: RootCN=45; RootWt=1000; SoilCN=14.5; EnrACoeff=7.4; EnrBCoeff=0.2; OCUnits=Total
              Thickness  OC    FBiom  FInert
              100        1.15  0.04   0.39
              100        1.04  0.02   0.47
              100        0.74  0.015  0.52
              200        0.56  0.01   0.62
              200        0.4   0.01   0.74
              200        0.49  0.01   0.83
              200        0.49  0.01   0.93
            Analysis: Thickness=[100, 100, 100, 200, 200, 200, 200]; PH=[6, 6, 6, 6.2, 6.5, 6.7, 6.8]; PHUnits=Water; BoronUnits=HotWater
            Sample: NO3Units=ppm; NH4Units=ppm; SWUnits=Volumetric; OCUnits=Total; PHUnits=Water
              Thickness  NO3  NH4
              100        15   5
              100        10   2.5
              100        5    1.5
              200        5    1.5
              200        5    1.5
              200        5    1.5
              200        2    1.5
            Sample InitialSW: Thickness=[100, 100, 100, 200, 200, 200, 200]; SW=[0.213, 0.213, 0.229, 0.176, 0.181, 0.188, 0.184]; NO3Units=ppm; NH4Units=ppm; SWUnits=Volumetric; OCUnits=Total; PHUnits=Water
        Factor Treatment20
          Specifications:
            [Operations]
            [soil]
          Operations 20
            1985-11-14  [Maize].Sow(population:4.87, cultivar:"Katumani", depth:50, rowSpacing:750);
            1985-11-10  [Irrigation].Apply(6.00);
          Soil: Latitude=0; Longitude=0
            Water: same as Africa.BMW1.Factors.Treatment19.soil.Water
            SoilWater: same as Africa.BMW1.Factors.Treatment19.soil.SoilWater
            SoilNitrogen: fom_type=[default, manure, mucuna, lablab, shemp, stable]; fract_carb=[0.2, 0.3, 0.54, 0.57, 0.45, 0]; fract_cell=[0.7, 0.3, 0.37, 0.37, 0.47, 0.1]; fract_lign=[0.1, 0.4, 0.09, 0.06, 0.08, 0.9]; wfpsN2N2O_x=[22, 88]; wfpsN2N2O_y=[0.1, 1]
            SoilOrganicMatter: same as Africa.BMW1.Factors.Treatment19.soil.SoilOrganicMatter
            Analysis: Thickness=[100, 100, 100, 200, 200, 200, 200]; PH=[6, 6, 6, 6.2, 6.5, 6.7, 6.8]; PHUnits=Water; BoronUnits=HotWater
            Sample: NO3Units=ppm; NH4Units=ppm; SWUnits=Volumetric; OCUnits=Total; PHUnits=Water
              Thickness  NO3  NH4
              100        15   5
              100        10   2.5
              100        5    1.5
              200        5    1.5
              200        5    1.5
              200        5    1.5
              200        2    1.5
            Sample InitialSW: Thickness=[100, 100, 100, 200, 200, 200, 200]; SW=[0.17, 0.17, 0.182, 0.208, 0.196, 0.187, 0.201]; NO3Units=ppm; NH4Units=ppm; SWUnits=Volumetric; OCUnits=Total; PHUnits=Water
        Factor Treatment21
          Specifications:
            [Operations]
            [soil]
          Operations 21
            1985-10-29  [Maize].Sow(population:2.34, cultivar:"Katumani", depth:50, rowSpacing:750);
            1985-11-12  [Irrigation].Apply(17.00);
            1985-11-16  [Irrigation].Apply(8.00);
            1985-11-20  [Irrigation].Apply(18.00);
            1985-11-26  [Irrigation].Apply(13.00);
            1985-11-28  [Irrigation].Apply(14.00);
            1985-12-05  [Irrigation].Apply(10.00);
            1985-12-10  [Irrigation].Apply(15.00);
            1985-12-15  [Irrigation].Apply(8.00);
            1985-12-18  [Irrigation].Apply(8.00);
            1985-12-23  [Irrigation].Apply(20.00);
            1986-01-05  [Irrigation].Apply(30.00);
            1986-01-20  [Irrigation].Apply(15.00);
          Soil: Latitude=0; Longitude=0
            Water: same as Africa.BMW1.Factors.Treatment8.soil.Water
            SoilWater: same as Africa.BMW1.Factors.Treatment8.soil.SoilWater
            SoilNitrogen: fom_type=[default, manure, mucuna, lablab, shemp, stable]; fract_carb=[0.2, 0.3, 0.54, 0.57, 0.45, 0]; fract_cell=[0.7, 0.3, 0.37, 0.37, 0.47, 0.1]; fract_lign=[0.1, 0.4, 0.09, 0.06, 0.08, 0.9]; wfpsN2N2O_x=[22, 88]; wfpsN2N2O_y=[0.1, 1]
            SoilOrganicMatter: same as Africa.BMW1.Factors.Treatment8.soil.SoilOrganicMatter
            Analysis: Thickness=[100, 100, 100, 200, 200, 200, 200, 200]; PH=[6, 6, 6, 6.2, 6.5, 6.7, 6.8, 6.8]; PHUnits=Water; BoronUnits=HotWater
            Sample: NO3Units=ppm; NH4Units=ppm; SWUnits=Volumetric; OCUnits=Total; PHUnits=Water
              Thickness  NO3  NH4
              100        15   5
              100        10   2.5
              100        5    1.5
              200        5    1.5
              200        5    1.5
              200        5    1.5
              200        2    1.5
              200        2    1.5
            Sample InitialSW: Thickness=[100, 100, 100, 200, 200, 200, 200, 200]; SW=[0.238, 0.238, 0.287, 0.244, 0.2, 0.194, 0.202, 0.194]; NO3Units=ppm; NH4Units=ppm; SWUnits=Volumetric; OCUnits=Total; PHUnits=Water
        Factor Treatment22
          Specifications:
            [Operations]
            [soil]
          Operations 22
            1985-10-29  [Maize].Sow(population:2.22, cultivar:"Katumani", depth:50, rowSpacing:750);
            1985-11-08  [Fertiliser].Apply(50, Fertiliser.Types.NH4NO3N, 10);
            1985-11-29  [Fertiliser].Apply(30, Fertiliser.Types.NH4NO3N, 10);
            1985-11-12  [Irrigation].Apply(17.00);
            1985-11-16  [Irrigation].Apply(8.00);
            1985-11-20  [Irrigation].Apply(18.00);
            1985-11-26  [Irrigation].Apply(13.00);
            1985-11-28  [Irrigation].Apply(14.00);
            1985-12-05  [Irrigation].Apply(10.00);
            1985-12-10  [Irrigation].Apply(15.00);
            1985-12-15  [Irrigation].Apply(8.00);
            1985-12-18  [Irrigation].Apply(8.00);
            1985-12-23  [Irrigation].Apply(20.00);
            1986-01-05  [Irrigation].Apply(30.00);
            1986-01-20  [Irrigation].Apply(15.00);
          Soil: Latitude=0; Longitude=0
            Water: same as Africa.BMW1.Factors.Treatment8.soil.Water
            SoilWater: same as Africa.BMW1.Factors.Treatment8.soil.SoilWater
            SoilNitrogen: fom_type=[default, manure, mucuna, lablab, shemp, stable]; fract_carb=[0.2, 0.3, 0.54, 0.57, 0.45, 0]; fract_cell=[0.7, 0.3, 0.37, 0.37, 0.47, 0.1]; fract_lign=[0.1, 0.4, 0.09, 0.06, 0.08, 0.9]; wfpsN2N2O_x=[22, 88]; wfpsN2N2O_y=[0.1, 1]
            SoilOrganicMatter: same as Africa.BMW1.Factors.Treatment8.soil.SoilOrganicMatter
            Analysis: Thickness=[100, 100, 100, 200, 200, 200, 200, 200]; PH=[6, 6, 6, 6.2, 6.5, 6.7, 6.8, 6.8]; PHUnits=Water; BoronUnits=HotWater
            Sample: NO3Units=ppm; NH4Units=ppm; SWUnits=Volumetric; OCUnits=Total; PHUnits=Water
              Thickness  NO3  NH4
              100        15   5
              100        10   2.5
              100        5    1.5
              200        5    1.5
              200        5    1.5
              200        5    1.5
              200        2    1.5
              200        2    1.5
            Sample InitialSW: Thickness=[100, 100, 100, 200, 200, 200, 200, 200]; SW=[0.193, 0.193, 0.203, 0.192, 0.186, 0.185, 0.194, 0.192]; NO3Units=ppm; NH4Units=ppm; SWUnits=Volumetric; OCUnits=Total; PHUnits=Water
        Factor Treatment23
          Specifications:
            [Operations]
            [soil]
          Operations 23
            1985-10-29  [Maize].Sow(population:6.54, cultivar:"Katumani", depth:50, rowSpacing:750);
            1985-11-12  [Irrigation].Apply(17.00);
            1985-11-16  [Irrigation].Apply(8.00);
            1985-11-20  [Irrigation].Apply(18.00);
            1985-11-26  [Irrigation].Apply(13.00);
            1985-11-28  [Irrigation].Apply(14.00);
            1985-12-05  [Irrigation].Apply(10.00);
            1985-12-10  [Irrigation].Apply(15.00);
            1985-12-15  [Irrigation].Apply(8.00);
            1985-12-18  [Irrigation].Apply(8.00);
            1985-12-23  [Irrigation].Apply(20.00);
            1986-01-05  [Irrigation].Apply(30.00);
            1986-01-20  [Irrigation].Apply(15.00);
          Soil: Latitude=0; Longitude=0
            Water: same as Africa.BMW1.Factors.Treatment19.soil.Water
            SoilWater: same as Africa.BMW1.Factors.Treatment19.soil.SoilWater
            SoilNitrogen: fom_type=[default, manure, mucuna, lablab, shemp, stable]; fract_carb=[0.2, 0.3, 0.54, 0.57, 0.45, 0]; fract_cell=[0.7, 0.3, 0.37, 0.37, 0.47, 0.1]; fract_lign=[0.1, 0.4, 0.09, 0.06, 0.08, 0.9]; wfpsN2N2O_x=[22, 88]; wfpsN2N2O_y=[0.1, 1]
            SoilOrganicMatter: same as Africa.BMW1.Factors.Treatment19.soil.SoilOrganicMatter
            Analysis: Thickness=[100, 100, 100, 200, 200, 200, 200]; PH=[6, 6, 6, 6.2, 6.5, 6.7, 6.8]; PHUnits=Water; BoronUnits=HotWater
            Sample: NO3Units=ppm; NH4Units=ppm; SWUnits=Volumetric; OCUnits=Total; PHUnits=Water
              Thickness  NO3  NH4
              100        15   5
              100        10   2.5
              100        5    1.5
              200        5    1.5
              200        5    1.5
              200        5    1.5
              200        2    1.5
            Sample InitialSW: Thickness=[100, 100, 100, 200, 200, 200, 200]; SW=[0.197, 0.197, 0.219, 0.194, 0.187, 0.184, 0.197]; NO3Units=ppm; NH4Units=ppm; SWUnits=Volumetric; OCUnits=Total; PHUnits=Water
        Factor Treatment24
          Specifications:
            [Operations]
            [soil]
          Operations 24
            1985-10-29  [Maize].Sow(population:6.54, cultivar:"Katumani", depth:50, rowSpacing:750);
            1985-11-08  [Fertiliser].Apply(50, Fertiliser.Types.NH4NO3N, 10);
            1985-11-29  [Fertiliser].Apply(30, Fertiliser.Types.NH4NO3N, 10);
            1985-11-12  [Irrigation].Apply(17.00);
            1985-11-16  [Irrigation].Apply(8.00);
            1985-11-20  [Irrigation].Apply(18.00);
            1985-11-26  [Irrigation].Apply(13.00);
            1985-11-28  [Irrigation].Apply(14.00);
            1985-12-05  [Irrigation].Apply(10.00);
            1985-12-10  [Irrigation].Apply(15.00);
            1985-12-15  [Irrigation].Apply(8.00);
            1985-12-18  [Irrigation].Apply(8.00);
            1985-12-23  [Irrigation].Apply(20.00);
            1986-01-05  [Irrigation].Apply(30.00);
            1986-01-20  [Irrigation].Apply(15.00);
          Soil: Latitude=0; Longitude=0
            Water: same as Africa.BMW1.Factors.Treatment1.soil.Water
            SoilWater: same as Africa.BMW1.Factors.Treatment1.soil.SoilWater
            SoilNitrogen: fom_type=[default, manure, mucuna, lablab, shemp, stable]; fract_carb=[0.2, 0.3, 0.54, 0.57, 0.45, 0]; fract_cell=[0.7, 0.3, 0.37, 0.37, 0.47, 0.1]; fract_lign=[0.1, 0.4, 0.09, 0.06, 0.08, 0.9]; wfpsN2N2O_x=[22, 88]; wfpsN2N2O_y=[0.1, 1]
            SoilOrganicMatter: same as Africa.BMW1.Factors.Treatment1.soil.SoilOrganicMatter
            Analysis: Thickness=[100, 100, 100, 200, 200, 200, 200, 200, 200]; PH=[6, 6, 6, 6.2, 6.5, 6.7, 6.8, 6.8, 6.8]; PHUnits=Water; BoronUnits=HotWater
            Sample: NO3Units=ppm; NH4Units=ppm; SWUnits=Volumetric; OCUnits=Total; PHUnits=Water
              Thickness  NO3  NH4
              100        15   5
              100        10   2.5
              100        5    1.5
              200        5    1.5
              200        5    1.5
              200        5    1.5
              200        2    1.5
              200        2    1.5
              200        1.5  1.5
            Sample InitialSW: Thickness=[100, 100, 100, 200, 200, 200, 200, 200, 200]; NO3Units=ppm; NH4Units=ppm; SWUnits=Volumetric; OCUnits=Total; PHUnits=Water
              SW=[0.215, 0.215, 0.261, 0.241, 0.23, 0.229, 0.222, 0.198, 0.209]
      Simulation BMW1: Area=0; Slope=0
        Weather: FileName=%root%\Prototypes\Maize\KATUMANI.MET
        Clock: StartDate=1985-10-27; EndDate=1986-10-21
        Summary summaryfile
        SoilArbitrator Soil Arbitrator
        Zone Field: Area=1; Slope=0
          Plant Maize: CropType=Maize
          MicroClimate: same as Africa.JMW2Katumani.JMW2Katumani.Field.MicroClimate
          Irrigation
          Fertiliser
          SurfaceOrganicMatter: PoolName=wheat; type=wheat; mass=0; standing_fraction=0; cnr=80; CriticalResidueWeight=2000; OptimumDecompTemp=20; MaxCumulativeEOS=20; CNRatioDecompCoeff=0.277; CNRatioDecompThreshold=25; TotalLeachRain=25; MinRainToLeach=10; CriticalMinimumOrganicC=0.004; DefaultCPRatio=0; DefaultStandingFraction=0; StandingExtinctCoeff=0.5; FractionFaecesAdded=0.5
            Pools:
              {PoolName=wheat, ResidueType=wheat, Mass=0, CNRatio=80, StandingFraction=0}
            ResidueTypes ResidueTypesList: LoadFromResource=ResidueTypes
          Operations
          Manager ExtraVariables: same as Africa.JMW2Katumani.JMW2Katumani.Field.ExtraVariables
          Arbitrator: ArbitrationMethod=Old; NutrientUptakeMethod=2
          Report: same as Africa.JMW2Kiboko.JMW2Kiboko.Field.Report
          Soil: Latitude=0; Longitude=0
            Water: same as Africa.BMW1.Factors.Treatment1.soil.Water
            SoilWater: same as Africa.BMW1.Factors.Treatment1.soil.SoilWater
            SoilNitrogen: fom_type=[default, manure, mucuna, lablab, shemp, stable]; fract_carb=[0.2, 0.3, 0.54, 0.57, 0.45, 0]; fract_cell=[0.7, 0.3, 0.37, 0.37, 0.47, 0.1]; fract_lign=[0.1, 0.4, 0.09, 0.06, 0.08, 0.9]; wfpsN2N2O_x=[22, 88]; wfpsN2N2O_y=[0.1, 1]
            SoilOrganicMatter: same as Africa.BMW1.Factors.Treatment1.soil.SoilOrganicMatter
            Analysis: Thickness=[100, 100, 100, 200, 200, 200, 200, 200, 200]; PH=[6, 6, 6, 6.2, 6.5, 6.7, 6.8, 6.8, 6.8]; PHUnits=Water; BoronUnits=HotWater
            Sample InitialN: NO3Units=ppm; NH4Units=ppm; SWUnits=Volumetric; OCUnits=Total; PHUnits=Water
              Thickness  NO3  NH4
              100        15   5
              100        10   2.5
              100        5    1.5
              200        5    1.5
              200        5    1.5
              200        5    1.5
              200        2    1.5
              200        2    1.5
              200        1.5  1.5
            Sample InitialSW: Thickness=[100, 100, 100, 200, 200, 200, 200, 200, 200]; NO3Units=ppm; NH4Units=ppm; SWUnits=Volumetric; OCUnits=Total; PHUnits=Water
              SW=[0.196, 0.196, 0.234, 0.224, 0.197, 0.199, 0.219, 0.225, 0.234]
          Report HarvestReport: same as Africa.JMW2Katumani.JMW2Katumani.Field.HarvestReport
          Manager Harvesting: same as Africa.JMW2Katumani.JMW2Katumani.Field.Harvesting
  Folder Australia
    Memo
      The data for two trials from near Katherine, Northern Territory, Australia, have been included from [Carberry_etal_1989] and [Carberry_&_Aberecht1991].  These include two planting dates for the summer of 1983/1984 (labelled as K841, K842).  At each planting date, cultivar Dekalb XL82 was sown at 4 populations (3, 5, 7, 9 plants/m<sup>2</sup>) under low and high irrigation conditions.  The low irrigation treatments only included preliminary applications to ensure crop establishment.
    Experiment K841
      Factors
        Factor Popn: Specifications=[Sowing]
          Operations 3
            1983-11-25  [Maize].Sow(population:3.0, cultivar:"Dekalb_XL82", depth:50, rowSpacing:1000);
          Operations 5
            1983-11-25  [Maize].Sow(population:5.0, cultivar:"Dekalb_XL82", depth:50, rowSpacing:1000);
          Operations 7
            1983-11-25  [Maize].Sow(population:7.0, cultivar:"Dekalb_XL82", depth:50, rowSpacing:1000);
          Operations 9
            1983-11-25  [Maize].Sow(population:9.0, cultivar:"Dekalb_XL82", depth:50, rowSpacing:1000);
        Factor Irrigation: Specifications=[IrrigSchedule]
          Operations Dry
            1983-11-21  [Irrigation].Apply(40.00);
            1983-11-26  [Irrigation].Apply(15.00);
          Operations Wet
            1983-11-21  [Irrigation].Apply(40.00);
            1983-11-26  [Irrigation].Apply(15.00);
            1983-12-01  [Irrigation].Apply(10.00);
            1983-12-09  [Irrigation].Apply(19.00);
            1983-12-13  [Irrigation].Apply(30.00);
            1983-12-18  [Irrigation].Apply(15.00);
            1983-12-20  [Irrigation].Apply(25.00);
            1983-12-23  [Irrigation].Apply(39.00);
            1984-01-06  [Irrigation].Apply(30.00);
            1984-02-03  [Irrigation].Apply(40.00);
            1984-02-10  [Irrigation].Apply(40.00);
      Simulation K841: Area=0; Slope=0
        Weather: FileName=%root%\Prototypes\Maize\CLS183.MET
        Clock: StartDate=1983-11-17; EndDate=1984-06-01
        Summary summaryfile
        SoilArbitrator Soil Arbitrator
        Zone Field: Area=1; Slope=0
          Plant Maize: CropType=Maize
          MicroClimate: same as Africa.JMW2Katumani.JMW2Katumani.Field.MicroClimate
          Irrigation
          Fertiliser
          SurfaceOrganicMatter: PoolName=wheat; type=wheat; mass=4000; standing_fraction=0; cnr=33; CriticalResidueWeight=2000; OptimumDecompTemp=20; MaxCumulativeEOS=20; CNRatioDecompCoeff=0.277; CNRatioDecompThreshold=25; TotalLeachRain=25; MinRainToLeach=10; CriticalMinimumOrganicC=0.004; DefaultCPRatio=0; DefaultStandingFraction=0; StandingExtinctCoeff=0.5; FractionFaecesAdded=0.5
            Pools:
              {PoolName=wheat, ResidueType=wheat, Mass=4000, CNRatio=33, StandingFraction=0}
            ResidueTypes ResidueTypesList: LoadFromResource=ResidueTypes
          Operations Sowing
          Operations NRate
            1983-11-23  [Fertiliser].Apply(120, Fertiliser.Types.UreaN, 10);
            1983-12-30  [Fertiliser].Apply(60, Fertiliser.Types.UreaN, 10);
            1984-02-02  [Fertiliser].Apply(60, Fertiliser.Types.UreaN, 10);
          Manager ExtraVariables: same as Africa.JMW2Katumani.JMW2Katumani.Field.ExtraVariables
          Arbitrator: ArbitrationMethod=Old; NutrientUptakeMethod=2
          Report: same as Africa.JMW2Kiboko.JMW2Kiboko.Field.Report
          Soil: Latitude=0; Longitude=0
            Water
              Thickness  BD    AirDry  LL15  DUL   SAT
              150        1.56  0.05    0.19  0.3   0.31
              150        1.52  0.08    0.21  0.31  0.33
              150        1.46  0.21    0.21  0.31  0.34
              150        1.46  0.22    0.22  0.32  0.34
              150        1.42  0.22    0.22  0.33  0.34
              150        1.42  0.22    0.22  0.33  0.34
              300        1.46  0.22    0.22  0.32  0.34
              300        1.5   0.23    0.23  0.34  0.35
              300        1.53  0.24    0.24  0.35  0.37
              SoilCrop MaizeSoil: LL=[0.19, 0.21, 0.21, 0.23, 0.23, 0.24, 0.25, 0.28, 0.28]; KL=[0.12, 0.12, 0.1, 0.08, 0.06, 0.04, 0.03, 0.02, 0.01]; XF=[1, 1, 1, 1, 1, 1, 1, 1, 1]
            SoilWater: residueinterception=0; SummerDate=1-Nov; SummerU=1.5; SummerCona=6.6; WinterDate=1-Apr; WinterU=1.5; WinterCona=6.6; DiffusConst=88; DiffusSlope=35.4; Salb=0.2; CN2Bare=85; CNRed=20; CNCov=0.8; slope=0; discharge_width=0; catchment_area=0; max_pond=0; Thickness=[150, 150, 150, 150, 150, 150, 300, 300, 300]; SWCON=[0.7, 0.7, 0.7, 0.7, 0.7, 0.7, 0.7, 0.7, 0.7]
            SoilNitrogen: fom_type=[default, manure, mucuna, lablab, shemp, stable]; fract_carb=[0.2, 0.3, 0.54, 0.57, 0.45, 0]; fract_cell=[0.7, 0.3, 0.37, 0.37, 0.47, 0.1]; fract_lign=[0.1, 0.4, 0.09, 0.06, 0.08, 0.9]; wfpsN2N2O_x=[22, 88]; wfpsN2N2O_y=[0.1, 1]
            SoilOrganicMatter: RootCN=36; RootWt=2000; SoilCN=14.5; EnrACoeff=7.4; EnrBCoeff=0.2; OCUnits=Total
              Thickness  OC    FBiom  FInert
              150        1.27  0.04   0.39
              150        0.59  0.02   0.47
              150        0.34  0.01   0.52
              150        0.34  0.01   0.62
              150        0.26  0.01   0.74
              150        0.26  0.01   0.83
              300        0.25  0.01   0.93
              300        0.19  0.01   0.93
              300        0.21  0.01   0.93
            Analysis: Thickness=[150, 150, 150, 150, 150, 150, 300, 300, 300]; PH=[6.5, 6.2, 6.3, 6.4, 6.5, 6.6, 6.6, 6.5, 6.5]; PHUnits=Water; BoronUnits=HotWater
            Sample InitialN: NO3Units=ppm; NH4Units=ppm; SWUnits=Volumetric; OCUnits=Total; PHUnits=Water
              Thickness  NO3  NH4
              150        2.4  0.6
              150        0.4  0.1
              150        0.1  0.1
              150        0.1  0.1
              150        0.1  0.1
              150        0.1  0.1
              300        0.1  0.1
              300        0.1  0.1
              300        0.1  0.1
            Sample InitialSW: Thickness=[150, 150, 150, 150, 150, 150, 300, 300, 300]; NO3Units=ppm; NH4Units=ppm; SWUnits=Volumetric; OCUnits=Total; PHUnits=Water
              SW=[0.304, 0.31, 0.31, 0.324, 0.328, 0.328, 0.325, 0.337, 0.35]
          Operations IrrigSchedule
            1983-11-21  [Irrigation].Apply(40.00);
            1983-11-26  [Irrigation].Apply(15.00);
          Report HarvestReport: same as Africa.JMW2Katumani.JMW2Katumani.Field.HarvestReport
          Manager Harvesting: same as Africa.JMW2Katumani.JMW2Katumani.Field.Harvesting
    Experiment K842
      Factors
        Factor Popn: Specifications=[Sowing]
          Operations 3
            1984-02-07  [Maize].Sow(population:3.0, cultivar:"Dekalb_XL82", depth:50, rowSpacing:1000);
          Operations 5
            1984-02-07  [Maize].Sow(population:5.0, cultivar:"Dekalb_XL82", depth:50, rowSpacing:1000);
          Operations 7
            1984-02-07  [Maize].Sow(population:7.0, cultivar:"Dekalb_XL82", depth:50, rowSpacing:1000);
          Operations 9
            1984-02-07  [Maize].Sow(population:9.0, cultivar:"Dekalb_XL82", depth:50, rowSpacing:1000);
        Factor Irrigation: Specifications=[IrrigSchedule]
          Operations Dry
            1984-02-05  [Irrigation].Apply(40.00);
            1984-02-10  [Irrigation].Apply(40.00);
          Operations Wet
            1984-02-05  [Irrigation].Apply(40.00);
            1984-02-10  [Irrigation].Apply(40.00);
            1984-03-22  [Irrigation].Apply(40.00);
            1984-03-28  [Irrigation].Apply(38.00);
            1984-03-31  [Irrigation].Apply(24.00);
            1984-04-01  [Irrigation].Apply(16.00);
            1984-04-04  [Irrigation].Apply(34.00);
            1984-04-08  [Irrigation].Apply(4.00);
            1984-04-12  [Irrigation].Apply(41.00);
            1984-04-17  [Irrigation].Apply(28.00);
            1984-04-19  [Irrigation].Apply(44.00);
            1984-04-24  [Irrigation].Apply(43.00);
            1984-04-28  [Irrigation].Apply(44.00);
            1984-05-04  [Irrigation].Apply(39.00);
            1984-05-09  [Irrigation].Apply(42.00);
            1984-05-14  [Irrigation].Apply(40.00);
      Simulation K842: Area=0; Slope=0
        Weather: FileName=%root%\Prototypes\Maize\CLS183.MET
        Clock: StartDate=1984-01-26; EndDate=1984-06-14
        Summary summaryfile
        SoilArbitrator Soil Arbitrator
        Zone Field: Area=1; Slope=0
          Plant Maize: CropType=Maize
          MicroClimate: same as Africa.JMW2Katumani.JMW2Katumani.Field.MicroClimate
          Irrigation
          Fertiliser
          SurfaceOrganicMatter: same as Australia.K841.K841.Field.SurfaceOrganicMatter
          Operations Sowing
          Operations NRate
            1984-02-05  [Fertiliser].Apply(120, Fertiliser.Types.UreaN, 10);
            1984-03-13  [Fertiliser].Apply(60, Fertiliser.Types.UreaN, 10);
            1984-04-17  [Fertiliser].Apply(60, Fertiliser.Types.UreaN, 10);
          Manager ExtraVariables: same as Africa.JMW2Katumani.JMW2Katumani.Field.ExtraVariables
          Arbitrator: ArbitrationMethod=Old; NutrientUptakeMethod=2
          Report: same as Africa.JMW2Kiboko.JMW2Kiboko.Field.Report
          Soil: same as Australia.K841.K841.Field.soil
          Operations IrrigSchedule
            1983-11-21  [Irrigation].Apply(40.00);
            1983-11-26  [Irrigation].Apply(15.00);
          Report HarvestReport: same as Africa.JMW2Katumani.JMW2Katumani.Field.HarvestReport
          Manager Harvesting: same as Africa.JMW2Katumani.JMW2Katumani.Field.Harvesting
    Experiment DRK1
      Factors
        Factor Sowing: Specifications=[Sowing]
          Operations Dec11
            1991-12-11  [Maize].Sow(population:6.7, cultivar:"GH_5009", depth:70, rowSpacing:750);
          Operations Feb20
            1991-02-20  [Maize].Sow(population:6.7, cultivar:"GH_5009", depth:70, rowSpacing:750);
          Operations Jan31
            1991-01-31  [Maize].Sow(population:6.7, cultivar:"GH_5009", depth:70, rowSpacing:750);
          Operations Mar12
            1991-03-12  [Maize].Sow(population:6.7, cultivar:"GH_5009", depth:70, rowSpacing:750);
          Operations Nov07
            1991-11-07  [Maize].Sow(population:6.7, cultivar:"GH_5009", depth:70, rowSpacing:750);
          Operations Oct10
            1991-10-10  [Maize].Sow(population:6.7, cultivar:"GH_5009", depth:70, rowSpacing:750);
          Operations Sep19
            1991-09-19  [Maize].Sow(population:6.7, cultivar:"GH_5009", depth:70, rowSpacing:750);
      Simulation DRK1: Area=0; Slope=0
        Weather: FileName=%root%\Prototypes\Maize\DRK.met
        Clock: StartDate=1991-01-01; EndDate=1992-04-30
        Summary summaryfile
        SoilArbitrator Soil Arbitrator
        Zone Field: Area=1; Slope=0
          Plant Maize: CropType=Maize
          MicroClimate: same as Africa.JMW2Katumani.JMW2Katumani.Field.MicroClimate
          Irrigation
          Fertiliser
          SurfaceOrganicMatter: same as Australia.K841.K841.Field.SurfaceOrganicMatter
          Operations Sowing
          Operations NRate
          Arbitrator: ArbitrationMethod=Old; NutrientUptakeMethod=2
          Report: EventNames=[Clock].DoReport
            VariableNames:
              [Clock].Today
              [Soil].SoilWater.Drainage
              [Soil].SoilWater.Runoff
              sum([Soil].SoilWater.SWmm) as ProfileWater
              [Soil].NO3N
              [Maize].Grain.Live.Wt
              [Maize].Stem.Live.Wt
              [Maize].EarLive.Wt
              [Maize].Leaf.Live.Wt
              [Maize].Root.Live.Wt
              [Maize].Husk.Live.Wt
              [Maize].EarLive.N
              [Maize].Grain.Live.N
              [Maize].Stem.Live.N
              [Maize].Leaf.Live.N
              [Maize].Root.Live.N
              [Maize].Root.WaterSupply
              [Maize].Root.WaterUptake
              [Maize].Leaf.Transpiration
              [Maize].Leaf.WaterDemand
              [Maize].Root.Depth
              [Maize].Leaf.CoverTotal
              [Maize].Leaf.CoverDead
              [Maize].Leaf.LAI
              [Maize].Leaf.Height
              [Maize].Leaf.CohortParameters.MaxArea.Value
              [Maize].Leaf.Fw
              [Maize].Leaf.Fn
              [Maize].Phenology.CurrentPhaseName
              [Maize].Phenology.Stage
              [Maize].AboveGroundLive.N
              [Maize].AboveGroundLive.Wt
              [Maize].Total.N
              [Maize].Total.Wt
              [Maize].Arbitrator.NDemand
              [Maize].Phenology.Stage
              [Maize].Leaf.ExpandedCohortNo
              [Maize].Leaf.AppearedCohortNo as FinalLeafNo
              [Maize].Structure.MainStemPrimordiaNo
              [Maize].Phenology.Photoperiod.Value
              [Maize].Grain.GrowthRateGrainDevelopment.Value
          Soil: Latitude=0; Longitude=0
            Water
              Thickness  BD    AirDry  LL15  DUL   SAT
              150        1.35  0.1     0.21  0.41  0.46
              150        1.54  0.1     0.19  0.37  0.39
              300        1.54  0.1     0.26  0.34  0.39
              300        1.53  0.1     0.26  0.35  0.39
              300        1.56  0.1     0.26  0.38  0.39
              300        1.54  0.1     0.26  0.36  0.39
              300        1.54  0.1     0.26  0.33  0.39
              SoilCrop MaizeSoil: LL=[0.21, 0.19, 0.26, 0.26, 0.26, 0.26, 0.26]; KL=[0.12, 0.12, 0.1, 0.08, 0.06, 0.04, 0.03]; XF=[1, 1, 1, 1, 1, 1, 1]
            SoilWater: same as Australia.K841.K841.Field.soil.SoilWater
            SoilNitrogen: fom_type=[default, manure, mucuna, lablab, shemp, stable]; fract_carb=[0.2, 0.3, 0.54, 0.57, 0.45, 0]; fract_cell=[0.7, 0.3, 0.37, 0.37, 0.47, 0.1]; fract_lign=[0.1, 0.4, 0.09, 0.06, 0.08, 0.9]; wfpsN2N2O_x=[22, 88]; wfpsN2N2O_y=[0.1, 1]
            SoilOrganicMatter: RootCN=36; RootWt=2000; SoilCN=14.5; EnrACoeff=7.4; EnrBCoeff=0.2; OCUnits=Total
              Thickness  OC   FBiom  FInert
              150        0.8  0.05   0.39
              150        0.6  0.02   0.47
              300        0.5  0.01   0.52
              300        0.3  0.01   0.62
              300        0.2  0.01   0.74
              300        0.2  0.01   0.83
              300        0.1  0.01   0.93
            Analysis: Thickness=[150, 150, 300, 300, 300, 300, 300]; PH=[8.9, 8.9, 9, 9, 9, 9, 9]; PHUnits=Water; BoronUnits=HotWater
            Sample InitialN: NO3Units=ppm; NH4Units=ppm; SWUnits=Volumetric; OCUnits=Total; PHUnits=Water
              Thickness  NO3  NH4
              150        2.4  0.6
              150        0.4  0.1
              150        0.1  0.1
              150        0.1  0.1
              150        0.1  0.1
              150        0.1  0.1
              300        0.1  0.1
              300        0.1  0.1
              300        0.1  0.1
            Sample InitialSW: Thickness=[150, 150, 150, 150, 150, 150, 300, 300, 300]; NO3Units=ppm; NH4Units=ppm; SWUnits=Volumetric; OCUnits=Total; PHUnits=Water
              SW=[0.304, 0.31, 0.31, 0.324, 0.328, 0.328, 0.325, 0.337, 0.35]
          Operations IrrigSchedule
          Report HarvestReport: EventNames=[Maize].Harvesting
            VariableNames:
              [Clock].Today
              [Maize].Phenology.CurrentStageName as Stage
              [Maize].Grain.Live.Wt as GrainWt
              [Maize].Stem.Live.Wt
              [Maize].EarLive.Wt
              [Maize].Leaf.Live.Wt
              [Maize].Root.Live.Wt
              [Maize].Husk.Live.Wt
              [Maize].Rachis.Live.Wt
              [Maize].EarLive.N
              [Maize].Grain.Live.N
              [Maize].Stem.Live.N
              [Maize].Leaf.Live.N
              [Maize].Root.Live.N
              [Maize].Root.Depth
              [Maize].AboveGround.N
              [Maize].AboveGround.Wt as Biomass
              [Maize].Total.N
              [Maize].Total.Wt
              max of [Maize].Leaf.LAI from [Maize].Sowing to [Maize].Harvesting as LAImax
              [Maize].Grain.NumberFunction.Value as GPSM
              [Maize].Grain.Size as GrainSize
              [Maize].Population
              [Maize].Phenology.FloweringDAS.Value as FloweringDAS
              [Maize].Phenology.MaturityDAS.Value as MaturityDAS
              [Maize].Leaf.AppearedCohortNo as FinalLeafNo
          Manager Harvesting: same as Africa.JMW2Katumani.JMW2Katumani.Field.Harvesting
          Manager KeepNonLimiting
```csharp
using System;
using Models.Core;
using System.Collections.Generic;
using System.Text;
using Models.Soils;
using Models.PMF;
using Models;
using System.Xml.Serialization;
using APSIM.Shared.Utilities;

namespace Models
{
	[Serializable] 
	public class Script : Model
	{      
		[Link] Plant Maize;          
		[Link] Zone zone;			
		[Link] Fertiliser Fertiliser;
		[Link] Irrigation Irrigation;
					
        
        [EventSubscribe("Commencing")]
        private void OnSimulationCommencing(object sender, EventArgs e)
        {
		}	   
		
		[EventSubscribe("DoManagement")]
		private void OnDoManagement(object sender, EventArgs e)
		{
        if (Maize.IsAlive)
           {
           Fertiliser.Apply(5.00, Fertiliser.Types.UreaN, 5);
           Irrigation.Apply(5.00);
           }
		}
		
		[EventSubscribe("DoManagementCalculations")]
		private void OnDoManagementCalculations(object sender, EventArgs e)
		{
			
		}
	}
}
```
    Experiment DRK2
      Factors
        Factor Sowing: Specifications=[Sowing]
          Operations Dec11
            1991-12-11  [Maize].Sow(population:6.7, cultivar:"Hycorn_40", depth:70, rowSpacing:750);
          Operations Feb20
            1991-02-20  [Maize].Sow(population:6.7, cultivar:"Hycorn_40", depth:70, rowSpacing:750);
          Operations Jan31
            1991-01-31  [Maize].Sow(population:6.7, cultivar:"Hycorn_40", depth:70, rowSpacing:750);
          Operations Mar12
            1991-03-12  [Maize].Sow(population:6.7, cultivar:"Hycorn_40", depth:70, rowSpacing:750);
          Operations Nov07
            1991-11-07  [Maize].Sow(population:6.7, cultivar:"Hycorn_40", depth:70, rowSpacing:750);
          Operations Oct10
            1991-10-10  [Maize].Sow(population:6.7, cultivar:"Hycorn_40", depth:70, rowSpacing:750);
          Operations Sep19
            1991-09-19  [Maize].Sow(population:6.7, cultivar:"Hycorn_40", depth:70, rowSpacing:750);
      Simulation DRK2: Area=0; Slope=0
        Weather: FileName=DRK.met
        Clock: StartDate=1991-01-01; EndDate=1992-04-30
        Summary summaryfile
        SoilArbitrator Soil Arbitrator
        Zone Field: Area=1; Slope=0
          Plant Maize: CropType=Maize
          MicroClimate: same as Africa.JMW2Katumani.JMW2Katumani.Field.MicroClimate
          Irrigation
          Fertiliser
          SurfaceOrganicMatter: same as Australia.K841.K841.Field.SurfaceOrganicMatter
          Operations Sowing
          Operations NRate
          Arbitrator: ArbitrationMethod=Old; NutrientUptakeMethod=2
          Report: EventNames=[Clock].DoReport
            VariableNames:
              [Clock].Today
              [Soil].SoilWater.Drainage
              [Soil].SoilWater.Runoff
              sum([Soil].SoilWater.SWmm) as ProfileWater
              [Soil].NO3N
              [Maize].Grain.Live.Wt
              [Maize].Stem.Live.Wt
              [Maize].EarLive.Wt
              [Maize].Leaf.Live.Wt
              [Maize].Root.Live.Wt
              [Maize].Husk.Live.Wt
              [Maize].EarLive.N
              [Maize].Grain.Live.N
              [Maize].Stem.Live.N
              [Maize].Leaf.Live.N
              [Maize].Root.Live.N
              [Maize].Root.WaterSupply
              [Maize].Root.WaterUptake
              [Maize].Leaf.Transpiration
              [Maize].Leaf.WaterDemand
              [Maize].Root.Depth
              [Maize].Leaf.CoverTotal
              [Maize].Leaf.CoverDead
              [Maize].Leaf.LAI
              [Maize].Leaf.Height
              [Maize].Leaf.CohortParameters.MaxArea.Value
              [Maize].Leaf.Fw
              [Maize].Leaf.Fn
              [Maize].Phenology.CurrentPhaseName
              [Maize].Phenology.Stage
              [Maize].AboveGroundLive.N
              [Maize].AboveGroundLive.Wt
              [Maize].Total.N
              [Maize].Total.Wt
              [Maize].Arbitrator.NDemand
              [Maize].Phenology.Stage
              [Maize].Leaf.ExpandedCohortNo
              [Maize].Leaf.AppearedCohortNo as FinalLeafNo
              [Maize].Structure.MainStemPrimordiaNo
              [Maize].Phenology.Photoperiod.Value
          Soil: same as Australia.DRK1.DRK1.Field.soil
          Operations IrrigSchedule
          Report HarvestReport: same as Australia.DRK1.DRK1.Field.HarvestReport
          Manager Harvesting: same as Africa.JMW2Katumani.JMW2Katumani.Field.Harvesting
          Manager KeepNonLimiting: same as Australia.DRK1.DRK1.Field.KeepNonLimiting
    Experiment DRK3
      Factors
        Factor Sowing: Specifications=[Sowing]
          Operations Dec11
            1991-12-11  [Maize].Sow(population:6.7, cultivar:"GH_5019WX", depth:70, rowSpacing:750);
          Operations Feb20
            1991-02-20  [Maize].Sow(population:6.7, cultivar:"GH_5019WX", depth:70, rowSpacing:750);
          Operations Jan31
            1991-01-31  [Maize].Sow(population:6.7, cultivar:"GH_5019WX", depth:70, rowSpacing:750);
          Operations Mar12
            1991-03-12  [Maize].Sow(population:6.7, cultivar:"GH_5019WX", depth:70, rowSpacing:750);
          Operations Nov07
            1991-11-07  [Maize].Sow(population:6.7, cultivar:"GH_5019WX", depth:70, rowSpacing:750);
          Operations Oct10
            1991-10-10  [Maize].Sow(population:6.7, cultivar:"GH_5019WX", depth:70, rowSpacing:750);
          Operations Sep19
            1991-09-19  [Maize].Sow(population:6.7, cultivar:"GH_5019WX", depth:70, rowSpacing:750);
      Simulation DRK3: Area=0; Slope=0
        Weather: FileName=%root%\Prototypes\Maize\DRK.met
        Clock: StartDate=1991-01-01; EndDate=1992-04-30
        Summary summaryfile
        SoilArbitrator Soil Arbitrator
        Zone Field: Area=1; Slope=0
          Plant Maize: CropType=Maize
          MicroClimate: same as Africa.JMW2Katumani.JMW2Katumani.Field.MicroClimate
          Irrigation
          Fertiliser
          SurfaceOrganicMatter: same as Australia.K841.K841.Field.SurfaceOrganicMatter
          Operations Sowing
          Operations NRate
          Arbitrator: ArbitrationMethod=Old; NutrientUptakeMethod=2
          Report: EventNames=[Clock].DoReport
            VariableNames:
              [Clock].Today
              [Soil].SoilWater.Drainage
              [Soil].SoilWater.Runoff
              sum([Soil].SoilWater.SWmm) as ProfileWater
              [Soil].NO3N
              [Maize].Grain.Live.Wt
              [Maize].Stem.Live.Wt
              [Maize].EarLive.Wt
              [Maize].Leaf.Live.Wt
              [Maize].Root.Live.Wt
              [Maize].Husk.Live.Wt
              [Maize].EarLive.N
              [Maize].Grain.Live.N
              [Maize].Stem.Live.N
              [Maize].Leaf.Live.N
              [Maize].Root.Live.N
              [Maize].Root.WaterSupply
              [Maize].Root.WaterUptake
              [Maize].Leaf.Transpiration
              [Maize].Leaf.WaterDemand
              [Maize].Root.Depth
              [Maize].Leaf.CoverTotal
              [Maize].Leaf.CoverDead
              [Maize].Leaf.LAI
              [Maize].Leaf.Height
              [Maize].Leaf.CohortParameters.MaxArea.Value
              [Maize].Leaf.Fw
              [Maize].Leaf.Fn
              [Maize].Phenology.CurrentPhaseName
              [Maize].Phenology.Stage
              [Maize].AboveGround.N
              [Maize].AboveGround.Wt
              [Maize].Total.N
              [Maize].Total.Wt
              [Maize].Arbitrator.NDemand
              [Maize].Phenology.Stage
              [Maize].Leaf.ExpandedCohortNo
              [Maize].Leaf.AppearedCohortNo as FinalLeafNo
              [Maize].Structure.MainStemPrimordiaNo
              [Maize].Phenology.Photoperiod.Value
          Soil: same as Australia.DRK1.DRK1.Field.soil
          Operations IrrigSchedule
          Report HarvestReport: same as Australia.DRK1.DRK1.Field.HarvestReport
          Manager Harvesting: same as Africa.JMW2Katumani.JMW2Katumani.Field.Harvesting
          Manager KeepNonLimiting: same as Australia.DRK1.DRK1.Field.KeepNonLimiting
    Experiment Angelo98
      Memo
        This data set has been published by [massignam2009]. Three sowings were conducted at the CSIRO Cooper field station (27o34'S, 152o20'E), Gatton, Australia. The soil was a Lockyer clay loam for sowing 1 and 2 and a Hooper clay loam for sowing 3.  Maize (Hycorn53) was sown on three dates to provide a range of growing environments.  Each sowing was provided with 3 rates of nitrogen.  To ensure moisture was non-limiting, the plots were irrigated weekly by trickle irrigation, except when rainfall occurred. Plots were weeded regularly and insect pests and foliar diseases controlled as required.
      Factors
        Factor Fert: Specifications=[NRate]
          Operations N0
          Operations N50
            1999-02-22  [Fertiliser].Apply(50, Fertiliser.Types.UreaN, 10);
          Operations N250
            1999-02-22  [Fertiliser].Apply(50, Fertiliser.Types.UreaN, 10);
            1999-03-24  [Fertiliser].Apply(100, Fertiliser.Types.UreaN, 10);
            1999-04-27  [Fertiliser].Apply(100, Fertiliser.Types.UreaN, 10);
      Simulation Angelo98: Area=0; Slope=0
        Weather: FileName=Angelo98.met
        Clock: StartDate=1999-02-19; EndDate=1999-07-23
        Summary summaryfile
        SoilArbitrator Soil Arbitrator
        Zone Field: Area=1; Slope=0
          Plant Maize: CropType=Maize
          MicroClimate: same as Africa.JMW2Katumani.JMW2Katumani.Field.MicroClimate
          Irrigation
          Fertiliser
          SurfaceOrganicMatter: same as Australia.K841.K841.Field.SurfaceOrganicMatter
          Operations Sowing
            1999-02-19  [Maize].Sow(population:6.7, cultivar:"Hycorn_53", depth:50, rowSpacing:750);
          Operations NRate
          Report: EventNames=[Clock].DoReport
            VariableNames:
              [Clock].Today
              [Soil].SoilWater.Drainage
              [Soil].SoilWater.Runoff
              sum([Soil].SoilWater.SWmm) as ProfileWater
              [Soil].NO3N
              [Maize].Grain.Live.Wt
              [Maize].Stem.Live.Wt
              [Maize].EarLive.Wt
              [Maize].Leaf.Live.Wt
              [Maize].Leaf.Dead.Wt
              [Maize].Root.Live.Wt
              [Maize].Husk.Live.Wt
              [Maize].EarLive.N
              [Maize].Grain.Live.N
              [Maize].Stem.Live.N
              [Maize].Leaf.Live.N
              [Maize].Leaf.Dead.N
              [Maize].Root.Live.N
              [Maize].Root.WaterSupply
              [Maize].Root.WaterUptake
              [Maize].Leaf.Transpiration
              [Maize].Leaf.WaterDemand
              [Maize].Root.Depth
              [Maize].Leaf.CoverTotal
              [Maize].Leaf.CoverDead
              [Maize].Leaf.LAI
              [Maize].Leaf.Height
              [Maize].Leaf.CohortParameters.MaxArea.Value
              [Maize].Leaf.Fw
              [Maize].Leaf.Fn
              [Maize].Phenology.CurrentPhaseName
              [Maize].Phenology.Stage
              [Maize].AboveGround.N
              [Maize].AboveGround.Wt
              [Maize].Total.N
              [Maize].Total.Wt
              [Maize].Arbitrator.NDemand
              [Maize].Phenology.Stage
              [Maize].Leaf.ExpandedCohortNo
              [Maize].Leaf.AppearedCohortNo as FinalLeafNo
              [Maize].Structure.MainStemPrimordiaNo
              [Maize].Phenology.Photoperiod.Value
              [Maize].Phenology.ThermalTime.Value
              [Maize].Rachis.Live.Wt
              [Maize].Husk.Live.Wt
          Operations IrrigSchedule
          Report HarvestReport: same as Australia.DRK1.DRK1.Field.HarvestReport
          Soil: SoilType=Gatton; Site=UQ Lawes; NearestTown=Unknown; Region=Lockyer; NaturalVegetation=Unknown; Latitude=0; Longitude=0
            InitialWater Initial water: PercentMethod=FilledFromTop; FractionFull=1
            Water
              Thickness  BD    AirDry  LL15  DUL   SAT
              150        1.32  0.13    0.26  0.41  0.47
              150        1.3   0.23    0.26  0.43  0.48
              300        1.23  0.26    0.26  0.46  0.51
              300        1.27  0.26    0.26  0.44  0.49
              300        1.37  0.25    0.25  0.4   0.45
              300        1.35  0.28    0.28  0.41  0.46
              300        1.35  0.31    0.31  0.38  0.46
              SoilCrop MaizeSoil: LL=[0.26, 0.26, 0.26, 0.26, 0.25, 0.28, 0.31]; KL=[0.1, 0.1, 0.1, 0.08, 0.06, 0.04, 0.02]; XF=[1, 1, 1, 1, 1, 1, 1]
            SoilWater: residueinterception=0; SummerDate=1-Nov; SummerU=6; SummerCona=3.5; WinterDate=1-Apr; WinterU=6; WinterCona=3.5; DiffusConst=40; DiffusSlope=16; Salb=0.11; CN2Bare=73; CNRed=20; CNCov=0.8; max_pond=0; Thickness=[150, 150, 300, 300, 300, 300, 300]; SWCON=[0.3, 0.3, 0.3, 0.3, 0.3, 0.3, 0.3]
            SoilNitrogen: fom_type=[default, manure, mucuna, lablab, shemp, stable]; fract_carb=[0.2, 0.3, 0.54, 0.57, 0.45, 0]; fract_cell=[0.7, 0.3, 0.37, 0.37, 0.47, 0.1]; fract_lign=[0.1, 0.4, 0.09, 0.06, 0.08, 0.9]; wfpsN2N2O_x=[22, 88]; wfpsN2N2O_y=[0.1, 1]
            SoilOrganicMatter: RootCN=40; RootWt=200; SoilCN=12.5; EnrACoeff=7.4; EnrBCoeff=0.2; OCUnits=Total
              Thickness  OC    FBiom  FInert
              150        1.24  0.03   0.5
              150        1.24  0.02   0.6
              300        0.8   0.01   0.7
              300        0.75  0.01   0.9
              300        0.71  0.01   0.95
              300        0.34  0.01   0.95
              300        0.26  0.01   0.95
            Analysis: Thickness=[150, 150, 300, 300, 300, 300, 300]; PH=[7, 7, 7, 7, 7, 7, 7]; PHUnits=Water; BoronUnits=HotWater
            Sample Initial nitrogen: NO3Units=ppm; NH4Units=ppm; SWUnits=Volumetric; OCUnits=Total; PHUnits=Water
              Thickness  NO3      NH4
              150        6.50002  0.1
              150        5.50002  0.1
              300        6.00002  0.1
              300        2.858    0.1
              300        2.055    0.1
              300        1.013    0.1
              300        0.203    0.1
          Manager CropManagement
            CropName = Maize
            AutoIrrigate = True
            DeficitDepth = 600
            DeficitTrigger = 50
            SoilWaterDeficit = 0
```csharp
using System;
using Models.Core;
using Models.PMF.OldPlant;
using Models.Soils;
using Models.Utilities;
using APSIM.Shared.Utilities;

namespace Models
{
	[Serializable]
	public class Script : Model
	{
		[Link] Clock Clock;
		[Link] Fertiliser Fertiliser;
		[Link] Irrigation Irrigation;
		[Link] Summary Summary;
		[Link] Soil Soil;
		ICrop Crop;
		
	
		[Description("Crop to be sown")]
		public string CropName { get; set; }

		[Description("Automatically irrigate on deficit (True/False)")]
		public bool AutoIrrigate { get; set; }
		[Description("Depth to use in calculating deficit (mm)")]
		public double DeficitDepth { get; set; }
		[Description("Deficit on which to irrigate (mm)")]
		public double DeficitTrigger { get; set; }
		
		public double SoilWaterDeficit { get; set; }
		
		[EventSubscribe("Commencing")]
		private void OnSimulationCommencing(object sender, EventArgs e)
		{
			SoilWaterDeficit = 0.0;
			
			foreach (IModel crop in Apsim.FindAll(this, typeof(ICrop)))
			{
				if (crop.Name == CropName)
					Crop = crop as ICrop;
			}
			if (Crop == null)
				throw new Exception("Could not find crop called " + CropName);
		}
		

		[EventSubscribe("DoManagement")]
		private void OnDoManagement(object sender, EventArgs e)
		{
	
	
			SoilWaterDeficit = 0;
			if (Crop.IsAlive)
			{
			
				for (int i = 0; i < Soil.Thickness.Length; i++)
				{
					SoilWaterDeficit += LayerProportion(i, DeficitDepth) *
					Math.Max(Soil.SoilWater.DULmm[i] - Soil.SoilWater.SWmm[i], 0.0);
				}	   
				if (SoilWaterDeficit >= DeficitTrigger)
				{
					if (Irrigation != null)
						Irrigation.Apply(SoilWaterDeficit);
				}
               
			}
			
		}

		private double LayerProportion(int layer, double root_depth)
		{
			double depth_to_layer_bottom = 0;   // depth to bottom of layer (mm)
			double depth_to_layer_top = 0;      // depth to top of layer (mm)
			double depth_to_root = 0;           // depth to root in layer (mm)
			double depth_of_root_in_layer = 0;  // depth of root within layer (mm)
			// Implementation Section ----------------------------------
			for (int i = 0; i <= layer; i++)
				depth_to_layer_bottom += Soil.Thickness[i];
			depth_to_layer_top = depth_to_layer_bottom - Soil.Thickness[layer];
			depth_to_root = Math.Min(depth_to_layer_bottom, root_depth);
			depth_of_root_in_layer = Math.Max(0.0, depth_to_root - depth_to_layer_top);

			return depth_of_root_in_layer / Soil.Thickness[layer];
		}
	}
		
}
```
          Manager Harvesting
            script: same as in Africa.JMW2Katumani.JMW2Katumani.Field.Harvesting
    Experiment Angelo99
      Factors
        Factor Fert: Specifications=[NRate]
          Operations N0
            1999-10-07  [Fertiliser].Apply(20, Fertiliser.Types.UreaN, 10);
          Operations N70
            1999-09-16  [Fertiliser].Apply(50, Fertiliser.Types.UreaN, 10);
            1999-10-26  [Fertiliser].Apply(20, Fertiliser.Types.UreaN, 10);
          Operations N300
            1999-09-16  [Fertiliser].Apply(50, Fertiliser.Types.UreaN, 10);
            1999-10-26  [Fertiliser].Apply(150, Fertiliser.Types.UreaN, 10);
            1999-12-02  [Fertiliser].Apply(100, Fertiliser.Types.UreaN, 10);
      Simulation Angelo99: Area=0; Slope=0
        Weather: FileName=Angelo99.met
        Clock: StartDate=1999-09-16; EndDate=2000-02-16
        Summary summaryfile
        SoilArbitrator Soil Arbitrator
        Zone Field: Area=1; Slope=0
          Plant Maize: CropType=Maize
          MicroClimate: same as Africa.JMW2Katumani.JMW2Katumani.Field.MicroClimate
          Irrigation
          Fertiliser
          SurfaceOrganicMatter: same as Australia.K841.K841.Field.SurfaceOrganicMatter
          Operations Sowing
            1999-09-16  [Maize].Sow(population:6.7, cultivar:"Hycorn_53", depth:50, rowSpacing:750);
          Operations NRate
          Report: EventNames=[Clock].DoReport
            VariableNames:
              [Clock].Today
              [Soil].SoilWater.Drainage
              [Soil].SoilWater.Runoff
              sum([Soil].SoilWater.SWmm) as ProfileWater
              [Soil].NO3N
              [Maize].Grain.Live.Wt
              [Maize].Stem.Live.Wt
              [Maize].EarLive.Wt
              [Maize].Leaf.Live.Wt
              [Maize].Leaf.Dead.Wt
              [Maize].Root.Live.Wt
              [Maize].Husk.Live.Wt
              [Maize].EarLive.N
              [Maize].Grain.Live.N
              [Maize].Stem.Live.N
              [Maize].Leaf.Live.N
              [Maize].Leaf.Dead.N
              [Maize].Root.Live.N
              [Maize].Root.WaterSupply
              [Maize].Root.WaterUptake
              [Maize].Leaf.Transpiration
              [Maize].Leaf.WaterDemand
              [Maize].Root.Depth
              [Maize].Leaf.CoverTotal
              [Maize].Leaf.CoverDead
              [Maize].Leaf.LAI
              [Maize].Leaf.Height
              [Maize].Leaf.CohortParameters.MaxArea.Value
              [Maize].Leaf.Fw
              [Maize].Leaf.Fn
              [Maize].Phenology.CurrentPhaseName
              [Maize].Phenology.Stage
              [Maize].AboveGround.N
              [Maize].AboveGround.Wt
              [Maize].Total.N
              [Maize].Total.Wt
              [Maize].Arbitrator.NDemand
              [Maize].Phenology.Stage
              [Maize].Leaf.ExpandedCohortNo
              [Maize].Leaf.AppearedCohortNo as FinalLeafNo
              [Maize].Structure.MainStemPrimordiaNo
              [Maize].Phenology.Photoperiod.Value
          Operations IrrigSchedule
          Report HarvestReport: same as Australia.DRK1.DRK1.Field.HarvestReport
          Soil: SoilType=Gatton; Site=UQ Lawes; NearestTown=Unknown; Region=Lockyer; NaturalVegetation=Unknown; Latitude=0; Longitude=0
            InitialWater Initial water: PercentMethod=FilledFromTop; FractionFull=1
            Water: same as Australia.Angelo98.Angelo98.Field.Soil.Water
            SoilWater: same as Australia.Angelo98.Angelo98.Field.Soil.SoilWater
            SoilNitrogen: fom_type=[default, manure, mucuna, lablab, shemp, stable]; fract_carb=[0.2, 0.3, 0.54, 0.57, 0.45, 0]; fract_cell=[0.7, 0.3, 0.37, 0.37, 0.47, 0.1]; fract_lign=[0.1, 0.4, 0.09, 0.06, 0.08, 0.9]; wfpsN2N2O_x=[22, 88]; wfpsN2N2O_y=[0.1, 1]
            SoilOrganicMatter: same as Australia.Angelo98.Angelo98.Field.Soil.SoilOrganicMatter
            Analysis: Thickness=[150, 150, 300, 300, 300, 300, 300]; PH=[7, 7, 7, 7, 7, 7, 7]; PHUnits=Water; BoronUnits=HotWater
            Sample Initial nitrogen: NO3Units=ppm; NH4Units=ppm; SWUnits=Volumetric; OCUnits=Total; PHUnits=Water
              Thickness  NO3   NH4
              150        2.35  0.05
              150        1.98  0.05
              300        0.82  0.05
              300        0.55  0.05
              300        0.45  0.05
              300        0.45  0.05
              300        0.47  0.05
          Manager CropManagement: same as Australia.Angelo98.Angelo98.Field.CropManagement
          Manager Harvesting: same as Africa.JMW2Katumani.JMW2Katumani.Field.Harvesting
    Experiment Angelo00
      Factors
        Factor Fert: Specifications=[NRate]
          Operations N0
          Operations N150
            2001-02-13  [Fertiliser].Apply(150, Fertiliser.Types.UreaN, 10);
          Operations N250
            2001-01-04  [Fertiliser].Apply(100, Fertiliser.Types.UreaN, 10);
            2001-02-13  [Fertiliser].Apply(150, Fertiliser.Types.UreaN, 10);
      Simulation Angelo00: Area=0; Slope=0
        Weather: FileName=Angelo00.met
        Clock: StartDate=2001-01-04; EndDate=2001-05-31
        Summary summaryfile
        SoilArbitrator Soil Arbitrator
        Zone Field: Area=1; Slope=0
          Plant Maize: CropType=Maize
          MicroClimate: same as Africa.JMW2Katumani.JMW2Katumani.Field.MicroClimate
          Irrigation
          Fertiliser
          SurfaceOrganicMatter: same as Australia.K841.K841.Field.SurfaceOrganicMatter
          Operations Sowing
            2001-01-04  [Maize].Sow(population:7, cultivar:"Hycorn_53", depth:50, rowSpacing:750);
          Operations NRate
          Report: same as Australia.Angelo99.Angelo99.Field.Report
          Operations IrrigSchedule
          Report HarvestReport: same as Australia.DRK1.DRK1.Field.HarvestReport
          Soil: SoilType=Gatton; Site=UQ Lawes; NearestTown=Unknown; Region=Lockyer; NaturalVegetation=Unknown; Latitude=0; Longitude=0
            InitialWater Initial water: PercentMethod=FilledFromTop; FractionFull=1
            Water: same as Australia.Angelo98.Angelo98.Field.Soil.Water
            SoilWater: same as Australia.Angelo98.Angelo98.Field.Soil.SoilWater
            SoilNitrogen: fom_type=[default, manure, mucuna, lablab, shemp, stable]; fract_carb=[0.2, 0.3, 0.54, 0.57, 0.45, 0]; fract_cell=[0.7, 0.3, 0.37, 0.37, 0.47, 0.1]; fract_lign=[0.1, 0.4, 0.09, 0.06, 0.08, 0.9]; wfpsN2N2O_x=[22, 88]; wfpsN2N2O_y=[0.1, 1]
            SoilOrganicMatter: same as Australia.Angelo98.Angelo98.Field.Soil.SoilOrganicMatter
            Analysis: Thickness=[150, 150, 300, 300, 300, 300, 300]; PH=[7, 7, 7, 7, 7, 7, 7]; PHUnits=Water; BoronUnits=HotWater
            Sample Initial nitrogen: NO3Units=ppm; NH4Units=ppm; SWUnits=Volumetric; OCUnits=Total; PHUnits=Water
              Thickness  NO3      NH4
              150        9.99996  0.1
              150        4.99998  0.1
              300        3.68998  0.1
              300        3.80998  0.1
              300        2.46598  0.1
              300        2.42999  0.1
              300        2.42999  0.1
          Manager CropManagement: same as Australia.Angelo98.Angelo98.Field.CropManagement
          Manager Harvesting: same as Africa.JMW2Katumani.JMW2Katumani.Field.Harvesting
  Folder USA
    Memo
      Testing of APSIM Maize, Soil Water, Soil Nitrogen, Manure, and Soil Temperature Modules in the Midwestern United States was undertaken by [Archontoulis_etal_2014] using APSIM version 7.4.  A subset of these data has been chosen for testing of the maize model. Datasets involving application of compost have not been included so as to concentrate on tests of maize model performance, rather than overall soil organic matter dynamics.
    Experiment Ames2011
      Factors
        Factor NRate: Specifications=[NRate]
          Operations 0
            2011-05-20  [Fertiliser].Apply(0, Fertiliser.Types.UreaN, 10);
          Operations 90
            2011-05-20  [Fertiliser].Apply(90, Fertiliser.Types.UreaN, 10);
          Operations 180
            2011-05-20  [Fertiliser].Apply(180, Fertiliser.Types.UreaN, 10);
      Simulation Ames2011: Area=0; Slope=0
        Weather: FileName=%root%\Prototypes\Maize\Ames2.met
        Clock: StartDate=2011-01-01; EndDate=2011-10-31
        Summary summaryfile
        SoilArbitrator Soil Arbitrator
        Zone Field: Area=1; Slope=0
          Plant Maize: CropType=Maize
          MicroClimate: same as Africa.JMW2Katumani.JMW2Katumani.Field.MicroClimate
          Irrigation
          Fertiliser
          SurfaceOrganicMatter: PoolName=soybean; type=soybean; mass=3500; standing_fraction=0; cnr=25; CriticalResidueWeight=2000; OptimumDecompTemp=20; MaxCumulativeEOS=20; CNRatioDecompCoeff=0.277; CNRatioDecompThreshold=25; TotalLeachRain=25; MinRainToLeach=10; CriticalMinimumOrganicC=0.004; DefaultCPRatio=0; DefaultStandingFraction=0; StandingExtinctCoeff=0.5; FractionFaecesAdded=0.5
            Pools:
              {PoolName=soybean, ResidueType=soybean, Mass=3500, CNRatio=25, StandingFraction=0}
            ResidueTypes ResidueTypesList: LoadFromResource=ResidueTypes
          Operations Sowing
            2011-05-10  [Maize].Sow(population:8.6, cultivar:"Laila", depth:40, rowSpacing:760);
          Operations NRate
            2011-05-20  [Fertiliser].Apply(0, Fertiliser.Types.UreaN, 10);
          Manager ExtraVariables: same as Africa.JMW2Katumani.JMW2Katumani.Field.ExtraVariables
          Arbitrator: ArbitrationMethod=Old; NutrientUptakeMethod=2
          Report: same as Africa.JMW2Kiboko.JMW2Kiboko.Field.Report
          Soil: LocalName=Clarion; NearestTown=Ames; State=Iowa; Country=USA; Latitude=0; Longitude=0; Comments=all data only from WSS
            DataSource=for Mahli al-Kaisi paper (Marsden Research farm), tes file , long term soybean
            Water
              Thickness  BD     AirDry  LL15   DUL    SAT
              180        1.425  0.144   0.16   0.297  0.412
              120        1.425  0.132   0.147  0.289  0.412
              160        1.425  0.147   0.147  0.289  0.412
              200        1.6    0.165   0.165  0.293  0.346
              250        1.6    0.165   0.165  0.293  0.346
              410        1.6    0.105   0.105  0.25   0.346
              200        1.6    0.105   0.105  0.25   0.346
              500        1.6    0.105   0.105  0.25   0.346
              SoilCrop MaizeSoil: LL=[0.16, 0.147, 0.147, 0.165, 0.165, 0.105, 0.105, 0.105]; KL=[0.08, 0.08, 0.08, 0.08, 0.08, 0.06, 0.03, 0.01]; XF=[1, 1, 1, 1, 1, 0.9, 0.5, 0.4]
            SoilWater: residueinterception=0; SummerDate=1-jun; SummerU=7.975; SummerCona=3.675; WinterDate=1-dec; WinterU=3.975; WinterCona=3.675; DiffusConst=40; DiffusSlope=16; Salb=0.13; CN2Bare=82; CNRed=20; CNCov=0.8; slope=0; discharge_width=0; catchment_area=0; max_pond=0; Thickness=[50, 100, 50, 100, 300, 300, 300, 320, 300, 200]
              SWCON=[0.414, 0.414, 0.414, 0.317, 0.296, 0.307, 0.307, 0.327, 0.348, 0.364]
            SoilNitrogen: fom_type=[default, manure, mucuna, lablab, shemp, stable]; fract_carb=[0.2, 0.3, 0.54, 0.57, 0.45, 0]; fract_cell=[0.7, 0.3, 0.37, 0.37, 0.47, 0.1]; fract_lign=[0.1, 0.4, 0.09, 0.06, 0.08, 0.9]; wfpsN2N2O_x=[22, 88]; wfpsN2N2O_y=[0.1, 1]
            SoilOrganicMatter: RootCN=45; RootWt=1000; SoilCN=14; EnrACoeff=7.4; EnrBCoeff=0.2; OCUnits=Total
              Thickness  OC     FBiom  FInert
              180        2.035  0.035  0.4
              120        1.453  0.018  0.512
              160        1.453  0.014  0.624
              200        0.727  0.01   0.768
              250        0.727  0.01   0.8
              410        0.145  0.01   0.8
              200        0.145  0.01   0.874
              500        0.1    0.01   0.96
            Analysis: Thickness=[180, 120, 160, 200, 250, 410, 200, 500]; PH=[6.317, 6.317, 6.317, 6.582, 6.582, 7.96, 7.96, 7.96]; PHUnits=Water; BoronUnits=HotWater
            Sample InitialN: NO3Units=kgha; NH4Units=kgha; SWUnits=Volumetric; OCUnits=Total; PHUnits=Water
              Thickness  NO3  NH4
              180        38   1
              120        38   1
              160        40   0
              200        40   0
              250        0    0
              410        0    0
              200        0    0
              500        0    0
            Sample InitialSW: Thickness=[180, 120, 160, 200, 250, 410, 200, 500]; SW=[0.297, 0.289, 0.289, 0.293, 0.293, 0.25, 0.25, 0.25]; NO3Units=ppm; NH4Units=ppm; SWUnits=Volumetric; OCUnits=Total; PHUnits=Water
          Report HarvestReport: EventNames=[Maize].Harvesting
            VariableNames:
              [Clock].Today
              [Maize].Phenology.CurrentStageName as Stage
              [Maize].Grain.Live.Wt as GrainWt
              [Maize].Stem.Live.Wt
              [Maize].EarLive.Wt
              [Maize].Leaf.Live.Wt
              [Maize].Root.Live.Wt
              [Maize].Husk.Live.Wt
              [Maize].Rachis.Live.Wt
              [Maize].EarLive.N
              [Maize].Grain.Live.N
              [Maize].Stem.Live.N
              [Maize].Leaf.Live.N
              [Maize].Root.Live.N
              [Maize].Root.Depth
              [Maize].AboveGround.N
              [Maize].AboveGround.Wt as Biomass
              [Maize].Total.N
              [Maize].Total.Wt
              max of [Maize].Leaf.LAI from [Maize].Sowing to [Maize].Harvesting as LAImax
              [Maize].Grain.NumberFunction.Value as GPSM
              [Maize].Grain.Size as GrainSize
              [Maize].Population
          Manager Harvesting: same as Africa.JMW2Katumani.JMW2Katumani.Field.Harvesting
    Simulation Ames2006: Area=0; Slope=0
      Weather: FileName=%root%\Prototypes\Maize\Ames2.met
      Clock: StartDate=2006-01-01; EndDate=2006-10-31
      Summary summaryfile
      SoilArbitrator Soil Arbitrator
      Zone Field: Area=1; Slope=0
        Plant Maize: CropType=Maize
        MicroClimate: same as Africa.JMW2Katumani.JMW2Katumani.Field.MicroClimate
        Irrigation
        Fertiliser
        SurfaceOrganicMatter: PoolName=soybean; type=soybean; mass=5000; standing_fraction=0; cnr=25; CriticalResidueWeight=2000; OptimumDecompTemp=20; MaxCumulativeEOS=20; CNRatioDecompCoeff=0.277; CNRatioDecompThreshold=25; TotalLeachRain=25; MinRainToLeach=10; CriticalMinimumOrganicC=0.004; DefaultCPRatio=0; DefaultStandingFraction=0; StandingExtinctCoeff=0.5; FractionFaecesAdded=0.5
          Pools:
            {PoolName=soybean, ResidueType=soybean, Mass=5000, CNRatio=25, StandingFraction=0}
          ResidueTypes ResidueTypesList: LoadFromResource=ResidueTypes
        Operations Sowing
          2006-04-26  [Maize].Sow(population:7.9, cultivar:"Laila", depth:60, rowSpacing:760);
        Operations NRate
          2006-04-24  [Fertiliser].Apply(112, Fertiliser.Types.UreaN, 10);
        Manager ExtraVariables: same as Africa.JMW2Katumani.JMW2Katumani.Field.ExtraVariables
        Arbitrator: ArbitrationMethod=Old; NutrientUptakeMethod=2
        Report: same as Africa.JMW2Kiboko.JMW2Kiboko.Field.Report
        Soil: LocalName=Nicollet; Region=Bremer; State=Iowa; Country=USA; Latitude=42.48; Longitude=-92.23; DataSource=from DSSAT soybean williams 1982
          Water
            Thickness  BD     AirDry  LL15   DUL    SAT
            50         1.248  0.052   0.131  0.256  0.312
            100        1.248  0.07    0.123  0.242  0.306
            50         1.248  0.1     0.119  0.245  0.305
            100        1.248  0.21    0.22   0.33   0.39
            300        1.318  0.205   0.205  0.34   0.4
            300        1.382  0.205   0.205  0.34   0.4
            300        1.551  0.175   0.175  0.31   0.368
            320        1.551  0.14    0.14   0.3    0.355
            300        1.551  0.14    0.14   0.3    0.355
            200        1.551  0.14    0.14   0.3    0.355
            SoilCrop MaizeSoil
              LL=[0.131, 0.123, 0.119, 0.22, 0.205, 0.205, 0.175, 0.14, 0.14, 0.14]
              KL=[0.08, 0.08, 0.08, 0.08, 0.08, 0.08, 0.07, 0.03, 0.02, 0.01]
              XF=[1, 1, 1, 1, 1, 1, 0.97, 0.7, 0.68, 0.66]
          SoilWater: residueinterception=0; SummerDate=1-Jun; SummerU=9; SummerCona=3.8; WinterDate=1-Dec; WinterU=9; WinterCona=3.8; DiffusConst=40; DiffusSlope=16; Salb=0.13; CN2Bare=82; CNRed=20; CNCov=0.8; slope=0; discharge_width=0; catchment_area=0; max_pond=0; Thickness=[50, 100, 50, 100, 300, 300, 300, 320, 300, 200]
            SWCON=[0.414, 0.414, 0.414, 0.317, 0.296, 0.307, 0.307, 0.327, 0.348, 0.364]
          SoilNitrogen: fom_type=[default, manure, mucuna, lablab, shemp, stable]; fract_carb=[0.2, 0.3, 0.54, 0.57, 0.45, 0]; fract_cell=[0.7, 0.3, 0.37, 0.37, 0.47, 0.1]; fract_lign=[0.1, 0.4, 0.09, 0.06, 0.08, 0.9]; wfpsN2N2O_x=[22, 88]; wfpsN2N2O_y=[0.1, 1]
          SoilOrganicMatter: RootCN=45; RootWt=1000; SoilCN=14; EnrACoeff=7.4; EnrBCoeff=0.2; OCUnits=Total
            Thickness  OC    FBiom  FInert
            50         3.2   0.035  0.4
            100        3.2   0.035  0.4
            50         3.2   0.024  0.46
            100        3.2   0.018  0.52
            300        2.47  0.013  0.68
            300        1.74  0.01   0.8
            300        0.15  0.01   0.8
            320        0.15  0.01   0.855
            300        0.15  0.01   0.954
            200        0.15  0.01   0.99
          Analysis: Thickness=[50, 100, 50, 100, 300, 300, 300, 320, 300, 400]; PH=[6.7, 6.7, 6.7, 6.7, 6.7, 6.7, 7.9, 7.9, 7.9, 7.9]; PHUnits=Water; BoronUnits=HotWater
          Sample InitialN: NO3Units=kgha; NH4Units=kgha; SWUnits=Volumetric; OCUnits=Total; PHUnits=Water
            Thickness  NO3  NH4
            50         10   3
            100        10   3
            50         10   3
            100        30   3
            300        10   0
            300        0    0
            300        0    0
            320        0    0
            300        0    0
            400        0    0
          Sample InitialSW: Thickness=[50, 100, 50, 100, 300, 300, 300, 320, 300, 200]; SW=[0.26, 0.24, 0.25, 0.33, 0.34, 0.34, 0.31, 0.3, 0.3, 0.3]; NO3Units=ppm; NH4Units=ppm; SWUnits=Volumetric; OCUnits=Total; PHUnits=Water
        Report HarvestReport: EventNames=[Maize].Harvesting
          VariableNames:
            [Clock].Today
            [Maize].Phenology.CurrentStageName as Stage
            [Maize].Grain.Live.Wt as GrainWt
            [Maize].Stem.Live.Wt
            [Maize].EarLive.Wt
            [Maize].Leaf.Live.Wt
            [Maize].Root.Live.Wt
            [Maize].Husk.Live.Wt
            [Maize].Rachis.Live.Wt
            [Maize].EarLive.N
            [Maize].Grain.Live.N
            [Maize].Stem.Live.N
            [Maize].Leaf.Live.N
            [Maize].Root.Live.N
            [Maize].Root.Depth
            [Maize].AboveGround.N
            [Maize].AboveGround.Wt as Biomass
            [Maize].Total.N
            [Maize].Total.Wt
            max of [Maize].Leaf.LAI from [Maize].Sowing to [Maize].Harvesting as LAImax
            [Maize].Grain.NumberFunction.Value as GPSM
            [Maize].Grain.Size.Value as GrainSize
            [Maize].Population
        Manager Harvesting: same as Africa.JMW2Katumani.JMW2Katumani.Field.Harvesting
    Simulation Ames2007: Area=0; Slope=0
      Weather: FileName=%root%\Prototypes\Maize\Ames2.met
      Clock: StartDate=2007-01-01; EndDate=2007-10-31
      Summary summaryfile
      SoilArbitrator Soil Arbitrator
      Zone Field: Area=1; Slope=0
        Plant Maize: CropType=Maize
        MicroClimate: same as Africa.JMW2Katumani.JMW2Katumani.Field.MicroClimate
        Irrigation
        Fertiliser
        SurfaceOrganicMatter: PoolName=maize; type=maize; mass=6000; standing_fraction=0; cnr=40; CriticalResidueWeight=2000; OptimumDecompTemp=20; MaxCumulativeEOS=20; CNRatioDecompCoeff=0.277; CNRatioDecompThreshold=25; TotalLeachRain=25; MinRainToLeach=10; CriticalMinimumOrganicC=0.004; DefaultCPRatio=0; DefaultStandingFraction=0; StandingExtinctCoeff=0.5; FractionFaecesAdded=0.5
          Pools:
            {PoolName=maize, ResidueType=maize, Mass=6000, CNRatio=40, StandingFraction=0}
          ResidueTypes ResidueTypesList: LoadFromResource=ResidueTypes
        Operations Sowing
          2007-05-17  [Maize].Sow(population:7.9, cultivar:"Laila", depth:60, rowSpacing:760);
        Operations NRate
          2007-05-14  [Fertiliser].Apply(112, Fertiliser.Types.UreaN, 10);
        Manager ExtraVariables: same as Africa.JMW2Katumani.JMW2Katumani.Field.ExtraVariables
        Arbitrator: ArbitrationMethod=Old; NutrientUptakeMethod=2
        Report: same as Africa.JMW2Kiboko.JMW2Kiboko.Field.Report
        Soil: LocalName=Canisteo; NearestTown=Ames; State=Iowa; Country=USA; Latitude=0; Longitude=0; DataSource=for varius test; Comments=from WSS and saxton
          Water
            Thickness  BD     AirDry  LL15   DUL    SAT    KS
            50         1.235  0.106   0.212  0.36   0.507  195
            200        1.235  0.191   0.212  0.36   0.507  195
            210        1.386  0.199   0.199  0.338  0.453  94
            150        1.385  0.172   0.172  0.318  0.454  158
            380        1.385  0.172   0.172  0.318  0.454  158
            660        1.6    0.106   0.106  0.234  0.376  199
            380        1.6    0.106   0.106  0.234  0.376  199
            SoilCrop MaizeSoil: LL=[0.212, 0.212, 0.199, 0.172, 0.172, 0.106, 0.106]; KL=[0.08, 0.08, 0.08, 0.08, 0.08, 0.04, 0.01]; XF=[1, 1, 1, 1, 1, 0.6, 0.2]
          SoilWater: residueinterception=0; SummerDate=1-Jun; SummerU=9.1; SummerCona=4; WinterDate=1-Dec; WinterU=9.1; WinterCona=4; DiffusConst=40; DiffusSlope=16; Salb=0.13; CN2Bare=82; CNRed=20; CNCov=0.8; slope=0; discharge_width=0; catchment_area=0; max_pond=0; Thickness=[50, 200, 210, 150, 380, 660, 380]; SWCON=[0.326, 0.326, 0.29, 0.333, 0.333, 0.408, 0.408]
          SoilNitrogen: fom_type=[default, manure, mucuna, lablab, shemp, stable]; fract_carb=[0.2, 0.3, 0.54, 0.57, 0.45, 0]; fract_cell=[0.7, 0.3, 0.37, 0.37, 0.47, 0.1]; fract_lign=[0.1, 0.4, 0.09, 0.06, 0.08, 0.9]; wfpsN2N2O_x=[22, 88]; wfpsN2N2O_y=[0.1, 1]
          SoilOrganicMatter: RootCN=45; RootWt=1000; SoilCN=14; EnrACoeff=7.4; EnrBCoeff=0.2; OCUnits=Total
            Thickness  OC     FBiom  FInert
            50         3.488  0.035  0.4
            200        3.488  0.028  0.44
            210        1.744  0.015  0.604
            150        1.744  0.011  0.748
            380        1.744  0.01   0.8
            660        0.174  0.01   0.842
            380        0.174  0.01   0.99
          Analysis: Thickness=[50, 200, 210, 150, 380, 660, 380]; PH=[7.96, 7.96, 7.96, 7.96, 7.96, 7.96, 7.96]; PHUnits=Water; BoronUnits=HotWater
          Sample InitialN: NO3Units=kgha; NH4Units=kgha; SWUnits=Volumetric; OCUnits=Total; PHUnits=Water
            Thickness  NO3  NH4
            50         50   10
            200        20   10
            210        20   5
            150        20   0
            380        10   0
            660        10   0
            380        10   0
          Sample InitialSW: Thickness=[50, 200, 210, 150, 380, 660, 380]; SW=[0.36, 0.36, 0.34, 0.32, 0.32, 0.23, 0.23]; NO3Units=ppm; NH4Units=ppm; SWUnits=Volumetric; OCUnits=Total; PHUnits=Water
        Report HarvestReport: same as USA.Ames2006.Field.HarvestReport
        Manager Harvesting: same as Africa.JMW2Katumani.JMW2Katumani.Field.Harvesting
  Folder NewZealand
    Memo
      Testing of APSIM Maize under New Zealand conditions to determine the perormance of the model under temperate conditions with cool springs and mild summers.  A range of trials have been conducted and are detailed below
    Experiment Lincoln2012
      Memo
        ### Lincoln2012 (Rain-Shelter Trail)

        Testing of APSIM Maize under New Zealand conditions was undertaken using the data of [Teixeira_etal_2014].  This dataset includes the impact of three N (0 to 250 kg/ha N) and two water regimes (dryland and fully irrigated) using a rain-shelter structure.  Observations include biomass growth and nitrogen content of individual organs, soil water contents, leaf area index, phenology and yield components. Total biomass ranged from 8000 kg/ha for dryland nil N crops to up to 28000kg/ha for fully irrigated and N fertilised crops.  Dryland crops recovered 25 percent less N from applied fertilizer than irrigated crops.
      Factors
        Factor Nit: Specifications=[Fert]
          Operations Nil
            2012-11-15  [Fertiliser].Apply(0, Fertiliser.Types.UreaN, 10);
            2012-12-20  [Fertiliser].Apply(0, Fertiliser.Types.UreaN, 10);
            2013-01-31  [Fertiliser].Apply(0, Fertiliser.Types.UreaN, 10);
          Operations Low
            2012-11-15  [Fertiliser].Apply(25, Fertiliser.Types.UreaN, 10);
            2012-12-20  [Fertiliser].Apply(50, Fertiliser.Types.UreaN, 10);
          Operations Med
            2012-11-15  [Fertiliser].Apply(50, Fertiliser.Types.UreaN, 10);
            2012-12-20  [Fertiliser].Apply(100, Fertiliser.Types.UreaN, 10);
            2013-01-31  [Fertiliser].Apply(100, Fertiliser.Types.UreaN, 10);
        Factor Irr: Specifications=[Irrig]
          Operations Full
            2012-10-24  [Irrigation].Apply(16);
            2012-10-26  [Irrigation].Apply(10);
            2012-11-03  [Irrigation].Apply(13);
            2012-11-11  [Irrigation].Apply(19.5);
            2012-11-15  [Irrigation].Apply(3.1);
            2012-11-23  [Irrigation].Apply(25);
            2012-11-29  [Irrigation].Apply(25);
            2012-11-30  [Irrigation].Apply(30);
            2012-12-13  [Irrigation].Apply(19);
            2012-12-20  [Irrigation].Apply(26);
            2012-12-20  [Irrigation].Apply(4);
            2012-12-27  [Irrigation].Apply(22);
            2013-01-03  [Irrigation].Apply(39.7);
            2013-01-10  [Irrigation].Apply(42.1);
            2013-01-17  [Irrigation].Apply(46.2);
            2013-01-24  [Irrigation].Apply(44.7);
            2013-01-31  [Irrigation].Apply(49.0);
            2013-02-07  [Irrigation].Apply(37);
            2013-02-14  [Irrigation].Apply(38);
            2013-02-21  [Irrigation].Apply(38);
            2013-02-28  [Irrigation].Apply(33.4);
            2013-03-07  [Irrigation].Apply(39.7);
            2013-03-14  [Irrigation].Apply(31.3);
            2013-03-21  [Irrigation].Apply(24);
            2013-03-28  [Irrigation].Apply(34);
            2013-04-04  [Irrigation].Apply(27.5);
          Operations Nil
            2012-10-24  [Irrigation].Apply(16);
            2012-10-26  [Irrigation].Apply(10);
            2012-11-03  [Irrigation].Apply(13);
            2012-11-11  [Irrigation].Apply(19.5);
            2012-11-15  [Irrigation].Apply(3.1);
            2012-11-23  [Irrigation].Apply(25);
            2012-11-29  [Irrigation].Apply(25);
            2012-12-20  [Irrigation].Apply(4);
            2013-01-31  [Irrigation].Apply(4.3);
      Simulation Lincoln2012: Area=0; Slope=0
        Weather: FileName=lincoln.met
        Clock: StartDate=2012-10-01; EndDate=2013-04-25
        Summary summaryfile
        SoilArbitrator Soil Arbitrator
        Zone RainShelter: Area=1; Slope=0
          Soil paparoa_silt_loam: SoilType=lignin_FOM; Region=Generic soil types; State=Canterbury; Latitude=999999; Longitude=999999
            DataSource=Profile descriptions provided by Trevor Webb and data for functional horizions based on SWAMP project results
            Water
              Thickness  BD     AirDry  LL15  DUL   SAT
              200        1.311  0.06    0.06  0.3   0.37
              200        1.474  0.12    0.12  0.3   0.37
              200        1.601  0.1     0.12  0.26  0.32
              200        1.68   0.13    0.13  0.24  0.3
              200        1.68   0.12    0.12  0.24  0.3
              200        1.68   0.15    0.15  0.21  0.3
              200        1.68   0.15    0.15  0.21  0.3
              200        1.68   0.15    0.15  0.21  0.3
              SoilCrop MaizeSoil: LL=[0.084, 0.12, 0.12, 0.15, 0.15, 0.06, 0.06, 0.06]; KL=[0.1, 0.075, 0.06, 0.06, 0.02, 0.005, 0.002, 0.001]; XF=[1, 0.7, 0.3, 0.3, 0.7, 1, 1, 1]
            SoilWater: residueinterception=0; SummerDate=1-Nov; SummerU=9; SummerCona=4.4; WinterDate=1-Apr; WinterU=6; WinterCona=3; DiffusConst=88; DiffusSlope=35; Salb=0.13; CN2Bare=73; CNRed=20; CNCov=0.8; max_pond=0; Thickness=[200, 200, 200, 200, 200, 200, 200, 200]; SWCON=[0.5, 0.56, 0.31, 0.7, 0.7, 0.7, 0.7, 0.7]
            SoilNitrogen: fom_type=[default, manure, mucuna, lablab, shemp, stable]; fract_carb=[0.2, 0.3, 0.54, 0.57, 0.45, 0]; fract_cell=[0.7, 0.3, 0.37, 0.37, 0.47, 0.1]; fract_lign=[0.1, 0.4, 0.09, 0.06, 0.08, 0.9]; wfpsN2N2O_x=[22, 88]; wfpsN2N2O_y=[0.1, 1]
            SoilOrganicMatter: RootCN=16; RootWt=6000; SoilCN=11; EnrACoeff=7.4; EnrBCoeff=0.2; OCUnits=Total
              Thickness  OC    FBiom  FInert
              200        3.6   0.03   0.3
              200        0.97  0.02   0.6
              200        0.42  0.01   0.8
              300        0.23  0.01   0.9
              300        0.23  0.01   0.9
              300        0.23  0.01   0.9
            Analysis: Thickness=[200, 200, 200, 300, 300, 300]; PH=[6, 6, 6, 6, 6, 6]; PHUnits=Water; BoronUnits=HotWater
            Sample Initial nitrogen: NO3Units=kgha; NH4Units=kgha; SWUnits=Volumetric; OCUnits=Total; PHUnits=Water
              Thickness  NO3    NH4   SW
              200        16.23  0.9   0.06
              200        10.76  2.92  0.25
              200        7.83   0.57  0.2
              300        6.85   0.98  0.2
              300        4.88   0.84  0.2
              300        1.74   0.54  0.2
          MicroClimate: same as Africa.JMW2Katumani.JMW2Katumani.Field.MicroClimate
          Irrigation
          Fertiliser
          SurfaceOrganicMatter: same as Africa.BMW1.BMW1.Field.SurfaceOrganicMatter
          Manager ClimateControl
            StartDate = 2012-10-23
            EndDate = 2013-04-10
```csharp
using System;
using Models.Core;
using APSIM.Shared.Utilities;



using System.Collections.Generic;
using System.Text;
using Models.PMF;
using Models;
using System.Xml.Serialization;

namespace Models
{
	[Serializable] 
	[System.Xml.Serialization.XmlInclude(typeof(Model))]
	public class Script : Model
	{
		[Link] Weather Met;
		[Link] Clock Clock;
    
		[Description("Start Date")]
		public DateTime StartDate { get; set; }
        
		[Description("End Date")]
		public DateTime EndDate { get; set; }
 
    
		[EventSubscribe("PreparingNewWeatherData")]
		private void OnPreparingNewWeatherData(object sender, EventArgs e)
		{
			if ((Clock.Today.Date >= StartDate) && (Clock.Today.Date <= EndDate))
				Met.Rain = 0;		
		}
	}
}
```
          Operations Irrig
            2012-10-24  [Irrigation].Apply(16);
            2012-10-26  [Irrigation].Apply(10);
            2012-11-03  [Irrigation].Apply(13);
            2012-11-11  [Irrigation].Apply(19.5);
            2012-11-15  [Irrigation].Apply(3.1);
            2012-11-23  [Irrigation].Apply(20);
            2012-11-29  [Irrigation].Apply(20);
            2012-11-30  [Irrigation].Apply(30);
            2012-12-13  [Irrigation].Apply(19);
            2012-12-20  [Irrigation].Apply(26);
            2012-12-20  [Irrigation].Apply(4);
            2012-12-27  [Irrigation].Apply(22);
            2013-01-03  [Irrigation].Apply(39.7);
            2013-01-10  [Irrigation].Apply(42.1);
            2013-01-17  [Irrigation].Apply(46.2);
            2013-01-24  [Irrigation].Apply(44.7);
            2013-01-31  [Irrigation].Apply(44.7);
            2013-01-31  [Irrigation].Apply(4.3);
            2013-02-07  [Irrigation].Apply(37);
            2013-02-14  [Irrigation].Apply(38);
            2013-02-21  [Irrigation].Apply(38);
            2013-02-28  [Irrigation].Apply(33.4);
            2013-03-07  [Irrigation].Apply(39.7);
            2013-03-14  [Irrigation].Apply(31.3);
            2013-03-21  [Irrigation].Apply(24);
            2013-03-28  [Irrigation].Apply(34);
            2013-04-04  [Irrigation].Apply(27.5);
          Operations Fert
            2012-11-15  [Fertiliser].Apply(50, Fertiliser.Types.UreaN, 10);
            2012-12-20  [Fertiliser].Apply(100, Fertiliser.Types.UreaN, 10);
            2013-01-31  [Fertiliser].Apply(100, Fertiliser.Types.UreaN, 10);
          Operations Sow
            2012-10-23  [Maize].Sow(population:11, cultivar:"Pioneer_39G12", depth:50, rowSpacing:710);
          Plant Maize: CropType=Maize
          Manager ExtraVariables
```csharp
using System;
using Models.Core;
using System.Collections.Generic;
using System.Text;
using Models.Soils;
using Models.PMF;
using Models;
using System.Xml.Serialization;
using APSIM.Shared.Utilities;

namespace Models
{
	[Serializable] 
	public class Script : Model
	{
		[Link] Clock Clock;
		[Link] Soils.Soil Soil;
		[Link] Models.SurfaceOM.SurfaceOrganicMatter SOM;
		[Link] Weather Met;
		[Link] Fertiliser Fert;
		[Link] Irrigation Irrig;
		[Link] Plant Maize;
		[Link] Zone zone;
					
		[XmlIgnore] public bool InitialDay { get; set; }
		
		[XmlIgnore] public double AccumPlantN { get; set; }
		[XmlIgnore] public double AccumMineralisation { get; set; }
		[XmlIgnore] public double AccumDenit { get; set; }
		[XmlIgnore] public double AccumFert { get; set; }
		[XmlIgnore] public double AccumLeach { get; set; }
		[XmlIgnore] public double AccumDetach { get; set; }
		[XmlIgnore] public double DeltaSoilOMN { get; set; }
		[XmlIgnore] public double DeltaSurfaceOMN { get; set; }
		[XmlIgnore] public double DeltaSoilMineralN { get; set; }
		[XmlIgnore] public double SoilNitrogenContent { get; set; }
		
		[XmlIgnore] public double AccumEO { get; set; }
		[XmlIgnore] public double AccumEP { get; set; }
		[XmlIgnore] public double AccumES { get; set; }
		[XmlIgnore] public double AccumDrainage { get; set; }
		[XmlIgnore] public double AccumRunoff { get; set; }
		[XmlIgnore] public double AccumOutflowLat { get; set; }
		[XmlIgnore] public double AccumIrrigation { get; set; }
		[XmlIgnore] public double AccumRainfall { get; set; }
		[XmlIgnore] public double SoilWaterDeficit { get; set; }
	
		[XmlIgnore] public double  InitialSoilOMN { get; set; }
		[XmlIgnore] public double  InitialSurfaceOMN { get; set; }
		[XmlIgnore] public double  InitialMineralN { get; set; }
		
		[XmlIgnore] public double SWC { get; set; }
		[XmlIgnore] public double DUL { get; set; }
		[XmlIgnore] public double OutFlowLat { get; set; }

		[XmlIgnore] public double FomN { get; set; }
		[XmlIgnore] public double BiomN { get; set; }
		[XmlIgnore] public double HumN { get; set; }
		[XmlIgnore] public double OrganicN { get; set; }
		[XmlIgnore] public double NO3N { get; set; }
		[XmlIgnore] public double NH4N { get; set; }
		[XmlIgnore] public double UreaN { get; set; }
		[XmlIgnore] public double MineralN { get; set; }
		[XmlIgnore] public double DltNMinRes { get; set; }
		[XmlIgnore] public double DltNMinTot { get; set; }
		
		[XmlIgnore] public double LeafExpandedPosition { get; set; }
		[XmlIgnore] public double LeafAppearedPosition { get; set; }
		[XmlIgnore] public double ExpandedLeafNoYesterday { get; set; }
		[XmlIgnore] public double AppearedLeafNoYesterday { get; set; }
		[XmlIgnore] public double MostRecentlyExpandedLeafSize { get; set; }
		[XmlIgnore] public double MostRecentlyAppearedLeafMaxSize { get; set; }
        
		[EventSubscribe("Commencing")]
		private void OnSimulationCommencing(object sender, EventArgs e)
		{
			InitialDay = true;
			LeafExpandedPosition = 0;
			LeafAppearedPosition = 0;
			ExpandedLeafNoYesterday = 0;
			AppearedLeafNoYesterday = 0;
			MostRecentlyExpandedLeafSize = 0;
			MostRecentlyAppearedLeafMaxSize = 0;
		}
		
		[EventSubscribe("DoManagement")]
		private void OnDoManagement(object sender, EventArgs e)
		{
			//!!!!!! Nitrogen balance components !!!!!!
			//!!!!!!^^^^^^^^^^^^^^^^^^^^^^^^^^^^^!!!!!!
			FomN = MathUtilities.Sum(Soil.SoilNitrogen.FOMN);
			HumN = MathUtilities.Sum(Soil.SoilNitrogen.HumicN);
			BiomN = MathUtilities.Sum(Soil.SoilNitrogen.MicrobialN);
			OrganicN = FomN + HumN + BiomN;
			NO3N = MathUtilities.Sum(Soil.NO3N);
			NH4N = MathUtilities.Sum(Soil.NH4N);
			UreaN = MathUtilities.Sum(Soil.SoilNitrogen.urea);
			MineralN = NO3N + NH4N + UreaN; 
			DltNMinRes = MathUtilities.Sum(Soil.SoilNitrogen.dlt_n_min_res);
			DltNMinTot = MathUtilities.Sum(Soil.SoilNitrogen.MineralisedN);
			int layers = Soil.Thickness.Length;
			if (InitialDay == true)
			{
				InitialSurfaceOMN = SOM.N;
				InitialSoilOMN = OrganicN;
				InitialMineralN = MineralN;
				InitialDay = false;
			}
			AccumFert += Fert.NitrogenApplied;
			DeltaSurfaceOMN = SOM.N - InitialSurfaceOMN;
			AccumLeach = AccumLeach - Soil.SoilWater.LeachNH4 - Soil.SoilWater.LeachNO3 - Soil.SoilWater.LeachUrea; //Fails
			AccumMineralisation += MathUtilities.Sum(Soil.SoilNitrogen.MineralisedN);
			AccumDenit -= MathUtilities.Sum(Soil.SoilNitrogen.Denitrification);
			AccumPlantN -= (double)zone.Get("Maize.Root.NUptake");
			DeltaSoilOMN = OrganicN - InitialSoilOMN;
			DeltaSoilMineralN = MineralN - InitialMineralN;
			SoilNitrogenContent = MineralN;
			
			//!!!!!! Water balance components !!!!!!
			//!!!!!!^^^^^^^^^^^^^^^^^^^^^^^^^^!!!!!!

			AccumIrrigation += Irrig.IrrigationApplied;
			AccumRainfall += Met.Rain;
			//AccumEP -= (double)zone.Get("[Maize].Leaf.Transpiration");
			AccumEP -= (double)zone.Get("Maize.Root.WaterUptake");
			SoilWaterDeficit = (SWC - DUL);
			double OutFlowLat = MathUtilities.Sum(Soil.SoilWater.outflow_lat);
			AccumOutflowLat -= OutFlowLat;
			
			//Leaf number variable
			ExpandedLeafNoYesterday = (double)zone.Get("Maize.Leaf.ExpandedCohortNo");
			AppearedLeafNoYesterday = (double)zone.Get("Maize.Leaf.AppearedCohortNo");
		}
		
		[EventSubscribe("DoManagementCalculations")]
		private void OnDoManagementCalculations(object sender, EventArgs e)
		{
			FomN = MathUtilities.Sum(Soil.SoilNitrogen.FOMN);
			HumN = MathUtilities.Sum(Soil.SoilNitrogen.HumicN);
			BiomN = MathUtilities.Sum(Soil.SoilNitrogen.MicrobialN);
			
			
			AccumEO -= Soil.SoilWater.Eo;
			AccumES -= Soil.SoilWater.Es; 
			AccumDrainage -= Soil.SoilWater.Drainage;
			AccumRunoff -= Soil.SoilWater.Runoff;
			SWC = MathUtilities.Sum(Soil.SoilWater.SWmm);
			DUL = MathUtilities.Sum(Soil.SoilWater.DULmm);
			
			if ((double)zone.Get("Maize.Leaf.ExpandedCohortNo") > ExpandedLeafNoYesterday)
			{
				LeafExpandedPosition = (double)zone.Get("Maize.Leaf.ExpandedCohortNo");
				MostRecentlyExpandedLeafSize = (double)zone.Get("Maize.Leaf.CohortSize[" + (int)LeafExpandedPosition + "]");
			}
			//else
			//	LeafExpandedPosition = 0;
			
			if ((double)zone.Get("Maize.Leaf.AppearedCohortNo") > AppearedLeafNoYesterday)
			{
				LeafAppearedPosition = (double)zone.Get("Maize.Leaf.AppearedCohortNo");
				MostRecentlyAppearedLeafMaxSize = (double)zone.Get("Maize.Leaf.CohortParameters.MaxArea.Value");
			}
			//else
			//LeafAppearedPosition = 0;
			
		}
	}
}
```
          Manager Harvesting: same as Australia.Angelo98.Angelo98.Field.Harvesting
          Report: EventNames=[Clock].DoReport
            VariableNames:
              [Clock].Today
              [ExtraVariables].Script.AccumPlantN
              [ExtraVariables].Script.AccumMineralisation
              [ExtraVariables].Script.AccumDenit
              [ExtraVariables].Script.AccumFert
              [ExtraVariables].Script.AccumLeach
              [ExtraVariables].Script.AccumDetach
              [ExtraVariables].Script.DeltaSoilOMN
              [ExtraVariables].Script.DeltaSurfaceOMN
              [ExtraVariables].Script.DeltaSoilMineralN
              [ExtraVariables].Script.SWC
              [ExtraVariables].Script.DUL
              [ExtraVariables].Script.OutFlowLat
              [ExtraVariables].Script.AccumEO
              [ExtraVariables].Script.AccumEP
              [ExtraVariables].Script.AccumES
              [ExtraVariables].Script.AccumDrainage
              [ExtraVariables].Script.AccumRunoff
              [ExtraVariables].Script.AccumRainfall
              [ExtraVariables].Script.AccumIrrigation
              [ExtraVariables].Script.AccumOutflowLat
              [ExtraVariables].Script.SoilWaterDeficit
              [ExtraVariables].Script.SoilNitrogenContent
              [ExtraVariables].Script.FomN
              [ExtraVariables].Script.HumN
              [ExtraVariables].Script.BiomN
              [ExtraVariables].Script.DltNMinRes
              [ExtraVariables].Script.DltNMinTot
              [Soil].SoilWater.SW
              [Soil].SoilWater.Eo
              [Soil].SoilWater.Es
              [Soil].SoilWater.Drainage
              [Soil].SoilWater.Runoff
              [Soil].SoilWater.pond
              sum([Soil].SoilWater.SWmm) as ProfileWater
              [Soil].NO3N
              [MicroClimate].net_radn
              [MicroClimate].peta
              [MicroClimate].petr
              [Maize].Grain.Live.Wt
              [Maize].Stem.Live.Wt
              [Maize].EarLive.Wt
              [Maize].Leaf.Live.Wt
              [Maize].Root.Live.Wt
              [Maize].Husk.Live.Wt
              [Maize].Rachis.Live.Wt
              [Maize].Tastle.Live.Wt
              [Maize].EarLive.N
              [Maize].Grain.Live.N
              [Maize].Stem.Live.N
              [Maize].Leaf.Live.N
              [Maize].Root.Live.N
              [Maize].Rachis.Live.N
              [Maize].Husk.Live.N
              [Maize].Root.WaterSupply
              [Maize].Root.WaterUptake
              [Maize].Leaf.Transpiration
              [Maize].Leaf.WaterDemand
              [Maize].Root.Depth
              [Maize].Leaf.CoverTotal
              [Maize].Leaf.CoverDead
              [Maize].Leaf.LAI
              [Maize].Leaf.Height
              [Maize].Leaf.CohortParameters.MaxArea.Value
              [Maize].Leaf.Fw
              [Maize].Leaf.Photosynthesis.FVPD.Value
              [Maize].Leaf.Photosynthesis.FT.Value
              [Maize].Leaf.Fn
              [Maize].Phenology.CurrentPhaseName
              [Maize].Phenology.Stage
              [Maize].AboveGroundLive.N
              [Maize].AboveGroundLive.Wt
              [Maize].Total.N
              [Maize].Total.Wt
              [Maize].Arbitrator.NDemand
              [Maize].Phenology.Stage
              [Maize].Leaf.ExpandedCohortNo
              [Maize].Leaf.AppearedCohortNo
              [Maize].Leaf.DeadCohortNo
              [Maize].Leaf.InitialisedCohortNo
              [Maize].Structure.MainStemFinalNodeNo
              [Maize].Structure.MainStemNodeNo
              [Maize].Structure.MainStemPrimordiaNo
              [Maize].Leaf.CohortArea[1:30]
              [Maize].Leaf.CohortSLA[1:30]
              [Maize].Leaf.CohortParameters.SpecificLeafAreaMax.Value
              [Maize].Leaf.CohortParameters.SpecificLeafAreaMin.Value
              [Maize].Arbitrator.NDemand
              [Maize].Arbitrator.NSupply
              [Maize].Arbitrator.DMSupply
              [Maize].Arbitrator.DMDemand
              [Maize].Arbitrator.DMAllocated
              [Maize].Arbitrator.DMSinkLimitation
              [Maize].Arbitrator.DMNutrientLimitation
              [Maize].Leaf.CohortParameters.GrowthDuration.Value
              [Maize].Leaf.CohortParameters.LagDuration.Value
              [Maize].Leaf.CohortParameters.SenescenceDuration.Value
              [Maize].Structure.MainStemNodeAppearanceRate.Value
              [Maize].Structure.Height
              [Maize].Stem.DMDemandFunction.PotentialDMAccumulation.Value
              [Maize].Stem.DMDemandFunction.HightLimitedDMAccumulation.Value
              [Maize].Structure.MainStemPrimordiaNo
              [Maize].Grain.NumberFunction.Value
              [ExtraVariables].Script.LeafAppearedPosition
              [ExtraVariables].Script.MostRecentlyAppearedLeafMaxSize
              [ExtraVariables].Script.LeafExpandedPosition
              [ExtraVariables].Script.MostRecentlyExpandedLeafSize
              [Maize].Leaf.DeadCohortNo
              [Phenology].ThermalTime.Value
              [Maize].Leaf.SenescingCohortNo
              [Maize].Stem.MaximumNConc.Value
              [Maize].Stem.MinimumNConc.Value
              [Maize].Stem.Live.NConc
              [Maize].Leaf.Live.NConc
              [Maize].Grain.Live.NConc
              [Maize].Husk.Live.NConc
              [Maize].Rachis.Live.NConc
              [Maize].Leaf.Dead.NConc
              [Maize].Leaf.Photosynthesis.RueAct
              [Maize].Stem.Live.StructuralWt
              [Maize].Grain.GrowthRateGrainDevelopment.Value
          Report HarvestReport: same as USA.Ames2006.Field.HarvestReport
    Experiment Lincoln2010
      Memo
        ### Lincoln2010 (Leaf properties trial)
        This trial was conducted to provide data for parametersising the Leaf Area model and is described in detail by [Teixeira_etal_2011].  Detailed measurements were conducted on leaf apperance and expansion with some measurements of biomass accumulation.  Treatments of plus and minus Nitrogen were applied but there was sufficient N in the soil than N responses were very small.
      Factors
        Factor Nitrogen: Specifications=[Fert]
          Operations Med
            2010-10-22  [Fertiliser].Apply(47, Fertiliser.Types.UreaN, 10);
            2010-12-17  [Fertiliser].Apply(200, Fertiliser.Types.UreaN, 10);
          Operations Nil
            2010-10-22  [Fertiliser].Apply(0, Fertiliser.Types.UreaN, 10);
            2010-12-17  [Fertiliser].Apply(0, Fertiliser.Types.UreaN, 10);
      Simulation Lincoln2010: Area=0; Slope=0
        Weather: FileName=%root%\Prototypes\Maize\lincoln.met
        Clock: StartDate=2010-10-01; EndDate=2011-04-20
        Summary summaryfile
        SoilArbitrator Soil Arbitrator
        Zone Field: Area=1; Slope=0
          Soil paparoa_silt_loam: SoilType=lignin_FOM; Region=Generic soil types; State=Canterbury; Latitude=999999; Longitude=999999
            DataSource=Profile descriptions provided by Trevor Webb and data for functional horizions based on SWAMP project results
            InitialWater Initial water: PercentMethod=EvenlyDistributed; FractionFull=0.8
            Water
              Thickness  BD     AirDry  LL15   DUL    SAT
              200        1.311  0.077   0.154  0.374  0.456
              200        1.474  0.152   0.152  0.32   0.413
              200        1.601  0.162   0.162  0.325  0.376
              300        1.68   0.06    0.06   0.15   0.3
              300        1.68   0.06    0.06   0.15   0.3
              300        1.68   0.06    0.06   0.15   0.3
              SoilCrop Barley: LL=[0.154, 0.152, 0.162, 0.06, 0.06, 0.06]; KL=[0.088, 0.088, 0.07, 0.066, 0.066, 0.066]; XF=[1, 1, 1, 1, 1, 1]
              SoilCrop Canola: LL=[0.154, 0.152, 0.162, 0.06, 0.06, 0.06]; KL=[0.075, 0.075, 0.06, 0.049, 0.049, 0.049]; XF=[1, 1, 0.51, 1, 1, 1]
              SoilCrop Cloverseed: LL=[0.154, 0.152, 0.162, 0.06, 0.06, 0.06]; KL=[0.05, 0.05, 0.04, 0.016, 0.016, 0.016]; XF=[1, 1, 0.73, 1, 1, 1]
              SoilCrop Fieldpea: LL=[0.154, 0.152, 0.162, 0.06, 0.06, 0.06]; KL=[0.1, 0.1, 0.054, 0.009, 0.009, 0.009]; XF=[1, 1, 0.3, 1, 1, 1]
              SoilCrop Fababean: LL=[0.154, 0.152, 0.162, 0.06, 0.06, 0.06]; KL=[0.1, 0.1, 0.08, 0.1, 0.1, 0.1]; XF=[1, 1, 0.51, 1, 1, 1]
              SoilCrop Foragebrassica: LL=[0.154, 0.152, 0.162, 0.06, 0.06, 0.06]; KL=[0.075, 0.075, 0.06, 0.049, 0.049, 0.049]; XF=[1, 1, 0.51, 1, 1, 1]
              SoilCrop Itallian_ryegrass: LL=[0.154, 0.152, 0.162, 0.06, 0.06, 0.06]; KL=[0.075, 0.075, 0.06, 0.057, 0.057, 0.057]; XF=[1, 1, 0.51, 1, 1, 1]
              SoilCrop Lucerne: LL=[0.154, 0.152, 0.162, 0.06, 0.06, 0.06]; KL=[0.038, 0.038, 0.03, 0.019, 0.019, 0.019]; XF=[1, 1, 1, 1, 1, 1]
              SoilCrop MaizeSoil: LL=[0.154, 0.152, 0.162, 0.06, 0.06, 0.06]; KL=[0.075, 0.075, 0.06, 0.049, 0.049, 0.049]; XF=[1, 1, 0.51, 1, 1, 1]
              SoilCrop Oats: LL=[0.154, 0.152, 0.162, 0.06, 0.06, 0.06]; KL=[0.075, 0.075, 0.06, 0.049, 0.049, 0.049]; XF=[1, 1, 0.73, 1, 1, 1]
              SoilCrop Potato: LL=[0.154, 0.152, 0.162, 0.06, 0.06, 0.06]; KL=[0.1, 0.057, 0.023, 0.002, 0.002, 0.002]; XF=[1, 1, 0.3, 1, 1, 1]
              SoilCrop Grassseed: LL=[0.154, 0.152, 0.162, 0.06, 0.06, 0.06]; KL=[0.05, 0.05, 0.025, 0.003, 0.003, 0.003]; XF=[1, 1, 0.51, 1, 1, 1]
              SoilCrop Wheat: LL=[0.154, 0.152, 0.162, 0.06, 0.06, 0.06]; KL=[0.075, 0.075, 0.06, 0.049, 0.049, 0.049]; XF=[1, 1, 0.73, 1, 1, 1]
              SoilCrop ryegrass_whiteclover: LL=[0.154, 0.152, 0.162, 0.06, 0.06, 0.06]; KL=[0.05, 0.05, 0.025, 0.003, 0.003, 0.003]; XF=[1, 1, 0.51, 1, 1, 1]
              SoilCrop ryegrass: LL=[0.154, 0.152, 0.162, 0.06, 0.06, 0.06]; KL=[0.05, 0.05, 0.025, 0.003, 0.003, 0.003]; XF=[1, 1, 0.51, 1, 1, 1]
              SoilCrop whiteclover: LL=[0.154, 0.152, 0.162, 0.06, 0.06, 0.06]; KL=[0.1, 0.1, 0.054, 0.009, 0.009, 0.009]; XF=[1, 1, 0.3, 1, 1, 1]
              SoilCrop kale: LL=[0.154, 0.152, 0.162, 0.06, 0.06, 0.06]; KL=[0.06, 0.06, 0.06, 0.06, 0.06, 0.06]; XF=[1, 1, 1, 1, 1, 1]
              SoilCrop triticale: LL=[0.154, 0.152, 0.162, 0.06, 0.06, 0.06]; KL=[0.088, 0.088, 0.07, 0.05, 0.05, 0.05]; XF=[1, 1, 0.73, 1, 1, 1]
            SoilWater: residueinterception=0; SummerDate=1-Nov; SummerU=9; SummerCona=4.4; WinterDate=1-Apr; WinterU=6; WinterCona=3; DiffusConst=88; DiffusSlope=35; Salb=0.13; CN2Bare=73; CNRed=20; CNCov=0.8; max_pond=0; Thickness=[200, 200, 200, 300, 300, 300]; SWCON=[0.5, 0.56, 0.31, 0.7, 0.7, 0.7]
            SoilNitrogen: fom_type=[default, manure, mucuna, lablab, shemp, stable]; fract_carb=[0.2, 0.3, 0.54, 0.57, 0.45, 0]; fract_cell=[0.7, 0.3, 0.37, 0.37, 0.47, 0.1]; fract_lign=[0.1, 0.4, 0.09, 0.06, 0.08, 0.9]; wfpsN2N2O_x=[22, 88]; wfpsN2N2O_y=[0.1, 1]
            SoilOrganicMatter: RootCN=16; RootWt=6000; SoilCN=11; EnrACoeff=7.4; EnrBCoeff=0.2; OCUnits=Total
              Thickness  OC    FBiom  FInert
              200        2.6   0.03   0.4
              200        0.97  0.02   0.6
              200        0.42  0.01   0.8
              300        0.23  0.01   0.9
              300        0.23  0.01   0.9
              300        0.23  0.01   0.9
            Analysis: Thickness=[200, 200, 200, 300, 300, 300]; PH=[6, 6, 6, 6, 6, 6]; PHUnits=Water; BoronUnits=HotWater
            Sample Initial nitrogen: NO3Units=kgha; NH4Units=ppm; SWUnits=Volumetric; OCUnits=Total; PHUnits=Water
              Thickness  NO3   NH4
              200        70    0.343249
              200        50    0.990502
              200        10    0.178014
              300        6.85  0.194444
              300        4.88  0.166667
              300        1.74  0.107143
          Irrigation
          SurfaceOrganicMatter: PoolName=fieldpea; type=fieldpea; mass=0; standing_fraction=0; cnr=40; CriticalResidueWeight=2000; OptimumDecompTemp=20; MaxCumulativeEOS=20; CNRatioDecompCoeff=0.277; CNRatioDecompThreshold=25; TotalLeachRain=25; MinRainToLeach=10; CriticalMinimumOrganicC=0.004; DefaultCPRatio=0; DefaultStandingFraction=0; StandingExtinctCoeff=0.5; FractionFaecesAdded=0.5
            Pools:
              {PoolName=fieldpea, ResidueType=fieldpea, Mass=0, CNRatio=40, StandingFraction=0}
            ResidueTypes ResidueTypesList: LoadFromResource=ResidueTypes
          Fertiliser
          Folder Manager folder
            Operations Sow
              2010-10-26  [Maize].Sow(population:12, cultivar:"Pioneer_39V43", depth:50, rowSpacing:760);
            Operations Fert
              2010-10-22  [Fertiliser].Apply(47, Fertiliser.Types.UreaN, 10);
              2010-12-17  [Fertiliser].Apply(200, Fertiliser.Types.UreaN, 10);
            Operations Irrig
              2010-10-29  [Irrigation].Apply(14);
              2010-12-03  [Irrigation].Apply(10);
              2010-12-20  [Irrigation].Apply(20);
              2011-01-06  [Irrigation].Apply(30);
              2011-01-17  [Irrigation].Apply(30);
              2011-02-04  [Irrigation].Apply(30);
              2011-02-17  [Irrigation].Apply(30);
              2011-03-03  [Irrigation].Apply(30);
          Manager SimCode
```csharp
using System;
using Models.Core;
using Models.PMF;
using Models.PMF.OldPlant;
using APSIM.Shared.Utilities;

namespace Models
{
	[Serializable]
	[System.Xml.Serialization.XmlInclude(typeof(Model))]
	public class Script : Model
	{
		[Link] Clock Clock;
		[EventSubscribe("Commencing")]
		private void OnSimulationCommencing(object sender, EventArgs e)
		{
			/*
				ExpNo = 1
TreatNo = 2
			*/
		}
	}
}
```
          MicroClimate: same as Africa.JMW2Katumani.JMW2Katumani.Field.MicroClimate
          Plant Maize: CropType=Maize
          Manager ExtraVariables: same as Africa.JMW2Katumani.JMW2Katumani.Field.ExtraVariables
          Report: same as Africa.JMW2Kiboko.JMW2Kiboko.Field.Report
          Report HarvestReport: same as USA.Ames2006.Field.HarvestReport
          Manager Harvesting: same as Africa.JMW2Katumani.JMW2Katumani.Field.Harvesting
    Experiment Lincoln2008
      Factors
        Factor Sow: Specifications=[SowDate]
          Operations Early39G12
            2008-09-17  [Maize].Sow(population:10.52, cultivar:"Pioneer_39G12", depth:50, rowSpacing:800);
          Operations Late39G12
            2008-11-12  [Maize].Sow(population:10.52, cultivar:"Pioneer_39G12", depth:50, rowSpacing:800);
          Operations Early34K77
            2008-09-17  [Maize].Sow(population:10.52, cultivar:"Pioneer_34K77", depth:50, rowSpacing:800);
          Operations Late34K77
            2008-11-12  [Maize].Sow(population:10.52, cultivar:"Pioneer_34K77", depth:50, rowSpacing:800);
        Factor Cover: Specifications=[Fert]
          Operations Bare
            2008-09-16  [Fertiliser].Apply(140.5, Fertiliser.Types.UreaN, 10);
            2008-12-17  [Fertiliser].Apply(161, Fertiliser.Types.UreaN, 10);
      Simulation Lincoln2008: Area=0; Slope=0
        Weather: FileName=%root%\Prototypes\Maize\lincoln.met
        Clock: StartDate=2008-06-01; EndDate=2009-06-15
        Summary summaryfile
        SoilArbitrator Soil Arbitrator
        Zone Field: Area=1; Slope=0
          Soil paparoa_silt_loam: SoilType=lignin_FOM; Region=Generic soil types; State=Canterbury; Latitude=999999; Longitude=999999
            DataSource=Profile descriptions provided by Trevor Webb and data for functional horizions based on SWAMP project results
            InitialWater Initial water: PercentMethod=EvenlyDistributed; FractionFull=0.8
            Water: same as NewZealand.Lincoln2010.Lincoln2010.Field.paparoa_silt_loam.Water
            SoilWater: same as NewZealand.Lincoln2010.Lincoln2010.Field.paparoa_silt_loam.SoilWater
            SoilNitrogen: fom_type=[default, manure, mucuna, lablab, shemp, stable]; fract_carb=[0.2, 0.3, 0.54, 0.57, 0.45, 0]; fract_cell=[0.7, 0.3, 0.37, 0.37, 0.47, 0.1]; fract_lign=[0.1, 0.4, 0.09, 0.06, 0.08, 0.9]; wfpsN2N2O_x=[22, 88]; wfpsN2N2O_y=[0.1, 1]
            SoilOrganicMatter: RootCN=16; RootWt=6000; SoilCN=11; EnrACoeff=7.4; EnrBCoeff=0.2; OCUnits=Total
              Thickness  OC    FBiom  FInert
              200        1.8   0.03   0.4
              200        0.97  0.02   0.6
              200        0.42  0.01   0.8
              300        0.23  0.01   0.9
              300        0.23  0.01   0.9
              300        0.23  0.01   0.9
            Analysis: Thickness=[200, 200, 200, 300, 300, 300]; PH=[6, 6, 6, 6, 6, 6]; PHUnits=Water; BoronUnits=HotWater
            Sample Initial nitrogen: NO3Units=ppm; NH4Units=ppm; SWUnits=Volumetric; OCUnits=Total; PHUnits=Water
              Thickness  NO3       NH4
              200        6.18993   0.343249
              200        3.64993   0.990502
              200        2.44535   0.178014
              300        1.35913   0.194444
              300        0.968254  0.166667
              300        0.345238  0.107143
          Irrigation
          SurfaceOrganicMatter: same as NewZealand.Lincoln2010.Lincoln2010.Field.SurfaceOrganicMatter
          Fertiliser
          MicroClimate: same as Africa.JMW2Katumani.JMW2Katumani.Field.MicroClimate
          Plant Maize: CropType=Maize
          Operations Fert
            2008-09-16  [Fertiliser].Apply(140.5, Fertiliser.Types.UreaN, 10);
            2008-12-17  [Fertiliser].Apply(161, Fertiliser.Types.UreaN, 10);
          Operations Irrig
            2008-10-21  [Irrigation].Apply(15);
            2008-10-29  [Irrigation].Apply(10);
            2008-11-18  [Irrigation].Apply(10);
            2008-11-27  [Irrigation].Apply(30);
            2008-12-02  [Irrigation].Apply(25);
            2008-12-09  [Irrigation].Apply(25);
            2008-12-30  [Irrigation].Apply(30);
            2009-01-06  [Irrigation].Apply(25);
            2009-01-13  [Irrigation].Apply(10);
            2009-01-26  [Irrigation].Apply(25);
            2009-01-29  [Irrigation].Apply(25);
            2009-02-04  [Irrigation].Apply(20);
            2009-02-10  [Irrigation].Apply(25);
            2009-03-18  [Irrigation].Apply(30);
          Operations SowDate
            2008-09-17  [Maize].Sow(population:10.52, cultivar:"Pioneer_3153", depth:50, rowSpacing:800);
          Report: EventNames=[Clock].DoReport
            VariableNames:
              [Clock].Today
              [ExtraVariables].Script.AccumPlantN
              [ExtraVariables].Script.AccumMineralisation
              [ExtraVariables].Script.AccumDenit
              [ExtraVariables].Script.AccumFert
              [ExtraVariables].Script.AccumLeach
              [ExtraVariables].Script.AccumDetach
              [ExtraVariables].Script.DeltaSoilOMN
              [ExtraVariables].Script.DeltaSurfaceOMN
              [ExtraVariables].Script.DeltaSoilMineralN
              [ExtraVariables].Script.SWC
              [ExtraVariables].Script.DUL
              [ExtraVariables].Script.OutFlowLat
              [ExtraVariables].Script.AccumEO
              [ExtraVariables].Script.AccumEP
              [ExtraVariables].Script.AccumES
              [ExtraVariables].Script.AccumDrainage
              [ExtraVariables].Script.AccumRunoff
              [ExtraVariables].Script.AccumRainfall
              [ExtraVariables].Script.AccumIrrigation
              [ExtraVariables].Script.AccumOutflowLat
              [ExtraVariables].Script.SoilWaterDeficit
              [ExtraVariables].Script.SoilNitrogenContent
              [ExtraVariables].Script.FomN
              [ExtraVariables].Script.HumN
              [ExtraVariables].Script.BiomN
              [ExtraVariables].Script.DltNMinRes
              [ExtraVariables].Script.DltNMinTot
              [Soil].SoilWater.SW
              [Soil].SoilWater.Eo
              [Soil].SoilWater.Es
              [Soil].SoilWater.Drainage
              [Soil].SoilWater.Runoff
              [Soil].SoilWater.pond
              sum([Soil].SoilWater.SWmm) as ProfileWater
              [Soil].NO3N
              [MicroClimate].net_radn
              [MicroClimate].peta
              [MicroClimate].petr
              [Maize].Grain.Live.Wt
              [Maize].Stem.Live.Wt
              [Maize].EarLive.Wt
              [Maize].Leaf.Live.Wt
              [Maize].Root.Live.Wt
              [Maize].Husk.Live.Wt
              [Maize].Rachis.Live.Wt
              [Maize].Tastle.Live.Wt
              [Maize].EarLive.N
              [Maize].Grain.Live.N
              [Maize].Stem.Live.N
              [Maize].Leaf.Live.N
              [Maize].Root.Live.N
              [Maize].Rachis.Live.N
              [Maize].Husk.Live.N
              [Maize].Root.WaterSupply
              [Maize].Root.WaterUptake
              [Maize].Leaf.Transpiration
              [Maize].Leaf.WaterDemand
              [Maize].Root.Depth
              [Maize].Leaf.CoverTotal
              [Maize].Leaf.CoverDead
              [Maize].Leaf.LAI
              [Maize].Leaf.Height
              [Maize].Leaf.CohortParameters.MaxArea.Value
              [Maize].Leaf.Fw
              [Maize].Leaf.Photosynthesis.FVPD.Value
              [Maize].Leaf.Photosynthesis.FT.Value
              [Maize].Leaf.Fn
              [Maize].Phenology.CurrentPhaseName
              [Maize].Phenology.Stage
              [Maize].AboveGroundLive.N
              [Maize].AboveGroundLive.Wt
              [Maize].Total.N
              [Maize].Total.Wt
              [Maize].Arbitrator.NDemand
              [Maize].Phenology.Stage
              [Maize].Leaf.ExpandedCohortNo
              [Maize].Leaf.AppearedCohortNo
              [Maize].Leaf.DeadCohortNo
              [Maize].Leaf.InitialisedCohortNo
              [Maize].Structure.MainStemFinalNodeNo
              [Maize].Structure.MainStemNodeNo
              [Maize].Structure.MainStemPrimordiaNo
              [Maize].Leaf.CohortArea[1:30]
              [Maize].Leaf.CohortSLA[1:30]
              [Maize].Leaf.CohortParameters.SpecificLeafAreaMax.Value
              [Maize].Leaf.CohortParameters.SpecificLeafAreaMin.Value
              [Maize].Arbitrator.NDemand
              [Maize].Arbitrator.DMSupply
              [Maize].Arbitrator.DMDemand
              [Maize].Arbitrator.DMAllocated
              [Maize].Arbitrator.DMSinkLimitation
              [Maize].Arbitrator.DMNutrientLimitation
              [Maize].Leaf.CohortParameters.GrowthDuration.Value
              [Maize].Leaf.CohortParameters.LagDuration.Value
              [Maize].Leaf.CohortParameters.SenescenceDuration.Value
              [Maize].Structure.MainStemNodeAppearanceRate.Value
              [Maize].Structure.Height
              [Maize].Stem.DMDemandFunction.PotentialDMAccumulation.Value
              [Maize].Stem.DMDemandFunction.HightLimitedDMAccumulation.Value
              [Maize].Structure.MainStemPrimordiaNo
              [Maize].Grain.NumberFunction.Value
              [ExtraVariables].Script.LeafAppearedPosition
              [ExtraVariables].Script.MostRecentlyAppearedLeafMaxSize
              [ExtraVariables].Script.LeafExpandedPosition
              [ExtraVariables].Script.MostRecentlyExpandedLeafSize
              [Maize].Leaf.DeadCohortNo
              [Phenology].ThermalTime.Value
              [Maize].Leaf.SenescingCohortNo
              [Maize].Stem.MaximumNConc.Value
              [Maize].Stem.MinimumNConc.Value
              [Maize].Stem.Live.NConc
              [Maize].Leaf.Live.NConc
              [Maize].Grain.Live.NConc
              [Maize].Husk.Live.NConc
              [Maize].Rachis.Live.NConc
              [Maize].Leaf.Dead.NConc
              [Maize].Leaf.Photosynthesis.RueAct
          Report HarvestReport: same as USA.Ames2006.Field.HarvestReport
          Manager ExtraVariables: same as Africa.JMW2Katumani.JMW2Katumani.Field.ExtraVariables
          Manager Harvesting: same as Africa.JMW2Katumani.JMW2Katumani.Field.Harvesting
    Experiment HawksBay2010
      Factors
        Factor Sow
          Factor Early: Specifications=[SowingRule].Script.SowingDate = 2010-10-04
          Factor Mid: Specifications=[SowingRule].Script.SowingDate = 2010-11-01
          Factor Late: Specifications=[SowingRule].Script.SowingDate = 2010-12-01
        Factor Cv
          Factor 39V43: Specifications=[SowingRule].Script.CultivarName = Pioneer_39V43
          Factor 38H20: Specifications=[SowingRule].Script.CultivarName = Pioneer_38H20
          Factor 33M54: Specifications=[SowingRule].Script.CultivarName = Pioneer_33M54
      Simulation HawksBay2010: Area=0; Slope=0
        Weather: FileName=%root%\Prototypes\Maize\HawkesBay.met
        Clock: StartDate=2010-10-01; EndDate=2011-06-15
        Summary summaryfile
        SoilArbitrator Soil Arbitrator
        Zone Field: Area=1; Slope=0
          Soil paparoa_silt_loam: same as NewZealand.Lincoln2008.Lincoln2008.Field.paparoa_silt_loam
          Irrigation
          SurfaceOrganicMatter: same as NewZealand.Lincoln2010.Lincoln2010.Field.SurfaceOrganicMatter
          Fertiliser
          MicroClimate: same as Africa.JMW2Katumani.JMW2Katumani.Field.MicroClimate
          Plant Maize: CropType=Maize
          Operations Fert
            2008-09-16  [Fertiliser].Apply(140.5, Fertiliser.Types.UreaN, 10);
            2008-12-17  [Fertiliser].Apply(161, Fertiliser.Types.UreaN, 10);
          Operations Irrig: same as NewZealand.Lincoln2008.Lincoln2008.Field.Irrig
          Report: same as NewZealand.Lincoln2008.Lincoln2008.Field.Report
          Report HarvestReport: same as USA.Ames2006.Field.HarvestReport
          Manager ExtraVariables
            script: same as in Africa.JMW2Katumani.JMW2Katumani.Field.ExtraVariables
          Manager Harvesting: same as Australia.Angelo98.Angelo98.Field.Harvesting
          Manager SowingRule
            RowSpace = 720
            PlantPopulation = 10.5
            PlantingDepth = 20
            CultivarName = Pioneer_39V43
            SowingDate = 2010-10-04
```csharp
using System;
using Models.Core;
using Models.PMF;
using APSIM.Shared.Utilities;
        
namespace Models
{
	[Serializable] 
	[System.Xml.Serialization.XmlInclude(typeof(Model))]
	public class Script : Model
	{
		[Link] Plant Maize;
		[Link] Clock Clock;

		[Description("Spacing (mm) betweenrows")]
		public double RowSpace { get; set; }
		[Description("Population (/m)")]
		public double PlantPopulation { get; set; }
		[Description("Depth (mm) tubers are planted")]
		public double PlantingDepth { get; set; }
		[Description("Cultivar")]
		public string CultivarName { get; set; }
		[Description("Sowing Date")]
		public DateTime SowingDate { get; set; }

		[EventSubscribe("DoManagement")]
		private void OnDoManagement(object sender, EventArgs e)
		{
			if (Clock.Today.Date == SowingDate)
				Maize.Sow(population: PlantPopulation, cultivar: CultivarName, depth: PlantingDepth, rowSpacing: RowSpace);
		}
	}
}
```
  Memo Combined Results
    ### Combined Results
    Simulation results for the combined datasets from the various countries are shown in the following graphs.  The model is able to adequately capture the influence of growing conditions (soil, climate) and management (population, Nitrogen, irrigation, sowing date).
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