Simulations: Version=3
  DataStore
    ExcelInput Observed: FileName=Observed.xlsx; SheetNames=[SoilWater, Residues]
    PredictedObserved: PredictedTableName=Report; ObservedTableName=SoilWater; FieldNameUsedForMatch=Clock.Today
      Tests: POName=PredictedObserved
        AcceptedStats:
          Name                    n     Slope      Intercept   SEslope     SEintercept  R2         RMSE       NSE         ME            MAE        RSR
          ProfileWater            672   0.820405   42.6074     0.0201283   3.13592      0.712604   21.2845    0.391829    15.0599       16.3383    0.779273
          Slurp.Leaf.CoverTotal   808   1.01273    -0.0413632  0.00721456  0.00572994   0.960704   0.0688335  0.946289    -0.0319836    0.0330666  0.231612
          Soil.SoilWater.SW(1)    8568  1.51161    -0.140421   0.0169045   0.00401266   0.482793   0.107315   -1.84511    -0.0234225    0.0890891  1.68665
          Soil.SoilWater.SW(2)    8568  0.446392   0.19961     0.00601773  0.00152242   0.391126   0.075498   -0.990482   0.0627217     0.0637075  1.41076
          Soil.SoilWater.SW(3)    1128  0.413333   0.175175    0.0141115   0.00387113   0.432442   0.0494816  0.341924    0.0182658     0.0341623  0.810859
          Soil.SoilWater.SW(4)    456   0.254741   0.263405    0.0225507   0.00276767   0.219406   0.176335   -36.6265    0.174483      0.174483   6.12731
          Soil.SoilWater.SW(5)    456   0.313998   0.25524     0.0308589   0.00275035   0.185704   0.195881   -132.312    0.195216      0.195216   11.5334
          Soil.SoilWater.SW(6)    456   0.23825    0.122367    0.0243196   0.00229563   0.174507   0.0548999  -7.16372    0.0519676     0.0519676  2.85409
          Soil.SoilWater.SW(7)    456   0.0968122  0.0925767   0.0229813   0.00241756   0.0376185  0.0232938  -0.0556047  -0.000202724  0.0178398  1.0263
          Soil.SoilWater.SW(8)    456   0.162701   0.0844562   0.0309266   0.00375902   0.0574595  0.0280596  -0.648482   -0.0156558    0.0234003  1.28252
          Soil.SoilWater.SW(9)    456   0.196458   0.0934555   0.037151    0.00378181   0.0580208  0.0247956  -0.759672   0.0130495     0.0170167  1.32507
          Soil.SoilWater.SWmm(1)  672   0.376229   -12.9667    0.0108621   0.568319     0.641656   45.5529    -33.587     -45.2436      45.2436    5.87669
          Soil.SoilWater.SWmm(2)  672   0.382141   30.848      0.0157097   0.788967     0.468975   7.11986    0.451236    0.39168       4.74208    0.740234
          Soil.SoilWater.SWmm(3)  672   0.611169   23.824      0.0197648   1.05964      0.587991   8.20477    0.497199    3.46895       5.34253    0.708557
        AcceptedStatsName=Name n Slope Intercept SEslope SEintercept R2 RMSE NSE ME MAE RSR
  Replacements
  Folder Validation
    Experiment LandP
      Memo
        In this test we run Slurp against a dataset of Soil water content measured over 3 years under lucerne with different irrigation treatments applied.  Slurp was able to reproduce the tempeoral patterns of the 4 different irrigation treatments with adequate accuracy.
      Factors
        Factor Irrigation
          Factor TwoPerWeek
            Specifications:
              [IrrigationEvents]
              [SetCropVariables].Script.Irrigation = High
            Operations IrrigationEvents
              2011-11-07  [Irrigation].Apply(30);
              2011-11-25  [Irrigation].Apply(13.6);
              2011-11-28  [Irrigation].Apply(20.1);
              2011-11-29  [Irrigation].Apply(16.4);
              2011-12-05  [Irrigation].Apply(27);
              2011-12-15  [Irrigation].Apply(8);
              2011-12-26  [Irrigation].Apply(22.5);
              2011-12-29  [Irrigation].Apply(16.5);
              2012-01-05  [Irrigation].Apply(22.8);
              2012-01-09  [Irrigation].Apply(17.8);
              2012-01-12  [Irrigation].Apply(9.1);
              2012-01-16  [Irrigation].Apply(18.3);
              2012-01-19  [Irrigation].Apply(18.6);
              2012-01-23  [Irrigation].Apply(22.5);
              2012-01-30  [Irrigation].Apply(8);
              2012-02-02  [Irrigation].Apply(12);
              2012-02-07  [Irrigation].Apply(16.5);
              2012-02-09  [Irrigation].Apply(13.3);
              2012-02-13  [Irrigation].Apply(12.2);
              2012-02-20  [Irrigation].Apply(13.3);
              2012-02-23  [Irrigation].Apply(8.8);
              2012-03-29  [Irrigation].Apply(10);
              2012-04-02  [Irrigation].Apply(6.5);
              2012-04-05  [Irrigation].Apply(5);
              2012-04-10  [Irrigation].Apply(6.9);
              2012-04-26  [Irrigation].Apply(4.6);
              2012-04-30  [Irrigation].Apply(6.9);
              2012-05-03  [Irrigation].Apply(3.2);
              2012-11-01  [Irrigation].Apply(18);
              2012-11-15  [Irrigation].Apply(12);
              2012-11-22  [Irrigation].Apply(12);
              2012-11-26  [Irrigation].Apply(12);
              2012-11-29  [Irrigation].Apply(12);
              2012-12-03  [Irrigation].Apply(6);
              2012-12-06  [Irrigation].Apply(12);
              2012-12-13  [Irrigation].Apply(12);
              2012-12-17  [Irrigation].Apply(20.8);
              2012-12-20  [Irrigation].Apply(12);
              2012-12-24  [Irrigation].Apply(12);
              2012-12-27  [Irrigation].Apply(9);
              2012-12-31  [Irrigation].Apply(12);
              2013-01-03  [Irrigation].Apply(12);
              2013-01-07  [Irrigation].Apply(18);
              2013-01-10  [Irrigation].Apply(18);
              2013-01-14  [Irrigation].Apply(21);
              2013-01-21  [Irrigation].Apply(15);
              2013-01-24  [Irrigation].Apply(15);
              2013-01-28  [Irrigation].Apply(15);
              2013-01-31  [Irrigation].Apply(15);
              2013-02-04  [Irrigation].Apply(18);
              2013-02-07  [Irrigation].Apply(6);
              2013-02-11  [Irrigation].Apply(18.7);
              2013-02-14  [Irrigation].Apply(13.5);
              2013-02-18  [Irrigation].Apply(15);
              2013-02-21  [Irrigation].Apply(15);
              2013-02-25  [Irrigation].Apply(15);
              2013-02-28  [Irrigation].Apply(32);
              2013-03-07  [Irrigation].Apply(12);
              2013-03-11  [Irrigation].Apply(9);
              2013-03-14  [Irrigation].Apply(9);
              2013-03-28  [Irrigation].Apply(18);
              2013-04-04  [Irrigation].Apply(9);
              2013-04-11  [Irrigation].Apply(9);
              2013-10-24  [Irrigation].Apply(9);
              2013-10-31  [Irrigation].Apply(15);
              2013-11-04  [Irrigation].Apply(6);
              2013-11-07  [Irrigation].Apply(9);
              2013-11-11  [Irrigation].Apply(9);
              2013-11-14  [Irrigation].Apply(9);
              2013-11-18  [Irrigation].Apply(12);
              2013-11-21  [Irrigation].Apply(12);
              2013-11-25  [Irrigation].Apply(9);
              2013-12-02  [Irrigation].Apply(9);
              2013-12-05  [Irrigation].Apply(12);
              2013-12-09  [Irrigation].Apply(6);
              2013-12-12  [Irrigation].Apply(11);
              2013-12-17  [Irrigation].Apply(15);
              2013-12-23  [Irrigation].Apply(7);
              2014-01-06  [Irrigation].Apply(14);
              2014-01-09  [Irrigation].Apply(12.6);
              2014-01-13  [Irrigation].Apply(15.7);
              2014-01-16  [Irrigation].Apply(14.7);
              2014-01-20  [Irrigation].Apply(17.5);
              2014-01-23  [Irrigation].Apply(7.5);
              2014-01-30  [Irrigation].Apply(10);
              2014-02-03  [Irrigation].Apply(12);
              2014-02-05  [Irrigation].Apply(10);
              2014-02-10  [Irrigation].Apply(9);
              2014-02-17  [Irrigation].Apply(10);
              2014-02-20  [Irrigation].Apply(10);
          Factor OnePerWeek
            Specifications:
              [IrrigationEvents]
              [SetCropVariables].Script.Irrigation = Med
            Operations IrrigationEvents
              2011-11-07  [Irrigation].Apply(30);
              2011-11-25  [Irrigation].Apply(13.6);
              2011-11-29  [Irrigation].Apply(36.5);
              2011-12-15  [Irrigation].Apply(34.9);
              2011-12-29  [Irrigation].Apply(41.8);
              2012-01-05  [Irrigation].Apply(22.8);
              2012-01-12  [Irrigation].Apply(26.9);
              2012-01-19  [Irrigation].Apply(36.8);
              2012-02-02  [Irrigation].Apply(19.8);
              2012-02-09  [Irrigation].Apply(30);
              2012-02-16  [Irrigation].Apply(13);
              2012-02-23  [Irrigation].Apply(14.3);
              2012-03-29  [Irrigation].Apply(10);
              2012-04-05  [Irrigation].Apply(11.4);
              2012-04-26  [Irrigation].Apply(11.5);
              2012-05-03  [Irrigation].Apply(10.1);
              2012-11-01  [Irrigation].Apply(18);
              2012-11-15  [Irrigation].Apply(12);
              2012-11-29  [Irrigation].Apply(24);
              2012-12-13  [Irrigation].Apply(21);
              2012-12-27  [Irrigation].Apply(33);
              2013-01-10  [Irrigation].Apply(42);
              2013-01-24  [Irrigation].Apply(39);
              2013-02-07  [Irrigation].Apply(30);
              2013-02-21  [Irrigation].Apply(42);
              2013-02-28  [Irrigation].Apply(20);
              2013-03-07  [Irrigation].Apply(30);
              2013-04-04  [Irrigation].Apply(27);
              2013-04-18  [Irrigation].Apply(15);
              2013-10-24  [Irrigation].Apply(12);
              2013-11-07  [Irrigation].Apply(24);
              2013-11-21  [Irrigation].Apply(33);
              2013-12-05  [Irrigation].Apply(30);
              2013-12-19  [Irrigation].Apply(17);
              2014-01-02  [Irrigation].Apply(12.7);
              2014-01-16  [Irrigation].Apply(40.9);
              2014-01-30  [Irrigation].Apply(35);
              2014-02-13  [Irrigation].Apply(25);
              2014-02-27  [Irrigation].Apply(32);
          Factor ThreeWeekly
            Specifications:
              [IrrigationEvents]
              [SetCropVariables].Script.Irrigation = Low
            Operations IrrigationEvents
              2011-11-07  [Irrigation].Apply(30);
              2011-11-29  [Irrigation].Apply(47.6);
              2011-12-15  [Irrigation].Apply(34.9);
              2011-12-29  [Irrigation].Apply(41.8);
              2012-01-12  [Irrigation].Apply(49.8);
              2012-01-26  [Irrigation].Apply(36.8);
              2012-02-09  [Irrigation].Apply(49.6);
              2012-02-23  [Irrigation].Apply(34.3);
              2012-04-05  [Irrigation].Apply(21.4);
              2012-05-03  [Irrigation].Apply(23.7);
              2012-11-01  [Irrigation].Apply(18);
              2012-11-22  [Irrigation].Apply(12);
              2012-12-13  [Irrigation].Apply(27);
              2013-01-03  [Irrigation].Apply(42);
              2013-01-24  [Irrigation].Apply(45);
              2013-02-14  [Irrigation].Apply(90.6);
              2013-02-28  [Irrigation].Apply(20);
              2013-03-07  [Irrigation].Apply(30);
              2013-03-28  [Irrigation].Apply(18);
              2013-04-18  [Irrigation].Apply(15);
              2013-10-24  [Irrigation].Apply(12);
              2013-11-14  [Irrigation].Apply(33);
              2013-12-05  [Irrigation].Apply(36);
              2014-01-16  [Irrigation].Apply(44.7);
              2014-02-05  [Irrigation].Apply(33.5);
              2014-02-27  [Irrigation].Apply(32);
          Factor None
            Specifications:
              [IrrigationEvents]
              [SetCropVariables].Script.Irrigation = Rain
            Operations IrrigationEvents
              2013-02-28  [Irrigation].Apply(20);
        Factor CoverType
          Factor Lucerne
            Specifications:
              [SlurpSowingRule].Script.SowingDate=2011-03-10
              [SlurpSowingRule].Script.CultivarName=Lucerne
              [SetCropVariables].Script.MaximumHeight = 600
              [SetCropVariables].Script.Cover = Lucerne
          Factor Pasture
            Specifications:
              [SlurpSowingRule].Script.SowingDate=2011-03-24
              [SlurpSowingRule].Script.CultivarName=Pasture
              [SetCropVariables].Script.MaximumHeight = 400
              [SetCropVariables].Script.Cover = Ryegrass
      Simulation LandPBase
        Weather: FileName=%root%\Examples\WeatherFiles\lincoln.met
        Clock: StartDate=2011-03-01; EndDate=2014-05-01
        Summary
        SoilArbitrator Soil Arbitrator
        Zone Field: Area=1; Slope=0
          Soil Lismore: Latitude=0; Longitude=0
            Analysis: Thickness=[100, 200, 300, 300, 300, 300]; PH=[6.6, 6.2, 5.7, 5.5, 5.5, 5.5]; PHUnits=Water; BoronUnits=HotWater
            MultiPoreWater: Salb=0.15; Thickness=[30, 170, 200, 200, 200, 200, 200, 200]; ParamThickness=[75, 75, 150, 100, 200, 200, 200, 200, 200, 1000]; DUL=[0.37, 0.33, 0.32, 0.3, 0.15, 0.1, 0.1, 0.11, 0.12, 0.12]; SAT=[0.57, 0.48, 0.48, 0.44, 0.4, 0.38, 0.37, 0.38, 0.39, 0.4]; XFlow=[3.9, 3.8, 3.7, 3.6, 3, 3, 3, 3, 3, 3]; PsiBub=[-15, -15, -15, -15, -10, -10, -10, -10, -10, -10]; MaxRepellentWC=[0.8, 0.8, 0.8, 0.8, 0.8, 0.8, 0.8, 0.8, 0.8, 0.8]; MinRepellentWC=[0.2, 0.2, 0.2, 0.2, 0.2, 0.2, 0.2, 0.2, 0.2, 0.2]; MinRepellancyFactor=[1, 1, 1, 1, 1, 1, 1, 1, 1, 1]; BD=[1.2, 1.2, 1.2, 1.2, 1.2, 1.2, 1.2, 1.2, 1.2, 1.2]; SubProfileConductance=20; WaterTableDepth=10; CalculateInfiltration=true; CalculateDrainage=true; ReportDetail=false; IncludeSorption=true; CalculateEvaporation=false; CalculateDiffusion=false; DiffusivityMultiplier=2; ExtractionMultiplier=10; ProfileWaterExtraction=0; TotalCover=0; ResidueWater=0; Hour=0; ReportLayer=0; TimeStep=0
              LL15=[0.15, 0.17, 0.17, 0.17, 0.02, 0.04, 0.04, 0.04, 0.04, 0.04]
              CFlow=[7E-11, 7E-11, 7E-11, 7E-11, 7E-11, 7E-11, 7E-11, 7E-11, 7E-11, 7E-11]
            MRSpline
            Evapotranspiration
            SoilNitrogen: fom_type=[default, manure, mucuna, lablab, shemp, stable]; fract_carb=[0.2, 0.3, 0.54, 0.57, 0.45, 0]; fract_cell=[0.7, 0.3, 0.37, 0.37, 0.47, 0.1]; fract_lign=[0.1, 0.4, 0.09, 0.06, 0.08, 0.9]; wfpsN2N2O_x=[22, 88]; wfpsN2N2O_y=[0.1, 1]; oc=[1.83566, 1.46334, 1.19884, 1.0301, 0.470338, 0.470138]
            SoilOrganicMatter: RootCN=30; RootWt=3000; SoilCN=11.5; EnrACoeff=7.4; EnrBCoeff=0.2; OCUnits=Total
              Thickness  OC    FBiom  FInert
              100        1.82  0.025  0.3
              200        1.47  0.025  0.4
              300        1.2   0.015  0.75
              300        1.03  0.01   0.9
              300        0.47  0.01   0.96
              300        0.47  0.01   0.96
            Sample Initial nitrogen: NO3Units=kgha; NH4Units=ppm; SWUnits=Volumetric; OCUnits=Total; PHUnits=Water
              Thickness  NO3  NH4
              100        217  0
              200        30   0
              300        5    0
              300        5    0
              300        0    0
              300        0    0
            Sample Initial water: Thickness=[75, 75, 150, 100, 200, 200, 200, 200, 200, 1000]; SW=[0.37, 0.33, 0.32, 0.3, 0.15, 0.1, 0.1, 0.11, 0.12, 0.14]; NO3Units=kgha; NH4Units=ppm; SWUnits=Volumetric; OCUnits=Total; PHUnits=Water
            LayerStructure
              Thickness=[30, 45, 75, 150, 100, 200, 200, 200, 200, 200, 200, 200, 200, 200, 200]
            ObservedSWLayering: Thickness=[150, 150, 100, 200, 200, 200, 200, 200, 200]
            WEIRDO MultiPoreWater: Salb=0.15; Thickness=[30, 170, 200, 200, 200, 200, 200, 200]; ParamThickness=[75, 75, 150, 100, 200, 200, 200, 200, 200, 1000]; DUL=[0.37, 0.33, 0.32, 0.3, 0.15, 0.1, 0.1, 0.11, 0.12, 0.12]; SAT=[0.57, 0.48, 0.48, 0.44, 0.4, 0.38, 0.37, 0.38, 0.39, 0.4]; XFlow=[3.9, 3.8, 3.7, 3.6, 3, 3, 3, 3, 3, 3]; PsiBub=[-15, -15, -15, -15, -10, -10, -10, -10, -10, -10]; MaxRepellentWC=[0.8, 0.8, 0.8, 0.8, 0.8, 0.8, 0.8, 0.8, 0.8, 0.8]; MinRepellentWC=[0.2, 0.2, 0.2, 0.2, 0.2, 0.2, 0.2, 0.2, 0.2, 0.2]; MinRepellancyFactor=[1, 1, 1, 1, 1, 1, 1, 1, 1, 1]; BD=[1.2, 1.2, 1.2, 1.2, 1.2, 1.2, 1.2, 1.2, 1.2, 1.2]; SubProfileConductance=20; WaterTableDepth=10; CalculateInfiltration=true; CalculateDrainage=true; ReportDetail=false; IncludeSorption=true; CalculateEvaporation=false; CalculateDiffusion=false; DiffusivityMultiplier=2; ExtractionMultiplier=10; ProfileWaterExtraction=0; TotalCover=0; ResidueWater=0; Hour=0; ReportLayer=0; TimeStep=0
              LL15=[0.15, 0.17, 0.17, 0.17, 0.02, 0.04, 0.04, 0.04, 0.04, 0.04]
              CFlow=[7E-11, 7E-11, 7E-11, 7E-11, 7E-11, 7E-11, 7E-11, 7E-11, 7E-11, 7E-11]
          Plant Slurp: CropType=Slurp
          MicroClimate: a_interception=0; b_interception=1; c_interception=0; d_interception=0; soil_albedo=0.23; sun_angle=15; soil_heat_flux_fraction=0.4; night_interception_fraction=0.5; refheight=2; albedo=0.26; emissivity=0.96; RadIntTotal=0
          Irrigation
          Fertiliser
          SurfaceOrganicMatter surface organic matter: PondActive=no; ReportAdditions=no; ReportRemovals=no; PoolName=wheat; type=wheat; mass=2000; standing_fraction=0; cnr=80; CriticalResidueWeight=2000; OptimumDecompTemp=20; MaxCumulativeEOS=20; CNRatioDecompCoeff=0.277; CNRatioDecompThreshold=25; TotalLeachRain=25; MinRainToLeach=10; CriticalMinimumOrganicC=0.004; DefaultCPRatio=0; DefaultStandingFraction=0; StandingExtinctCoeff=0.5; FractionFaecesAdded=0.5
            Pools:
              {PoolName=wheat, ResidueType=wheat, Mass=2000, CNRatio=80, StandingFraction=0}
            ResidueTypes: LoadFromResource=ResidueTypes
            TillageTypes TillageTypesList
          Operations IrrigationEvents
            1998-10-02  [Irrigation].Apply(40);
            1998-10-26  [Irrigation].Apply(70);
            1998-12-15  [Irrigation].Apply(70);
            1998-12-29  [Irrigation].Apply(10);
            1998-12-30  [Irrigation].Apply(55);
            1999-01-07  [Irrigation].Apply(50);
            1999-01-21  [Irrigation].Apply(40);
            1999-02-10  [Irrigation].Apply(28);
            1999-02-19  [Irrigation].Apply(15);
            1999-03-09  [Irrigation].Apply(25);
            1998-12-29  [Fertiliser].Apply(150, Fertiliser.Types.UreaN, 10);
            2011-11-07  [Irrigation].Apply(30);
            2011-11-25  [Irrigation].Apply(13.6);
            2011-11-28  [Irrigation].Apply(20.1);
          Manager ExtraVariables
```csharp
using System;
using Models.Core;
using System.Collections.Generic;
using System.Text;
using Models.Soils;
using Models.PMF;
using Models;
using System.Xml.Serialization;
using APSIM.Shared.Utilities;

namespace Models
{
	[Serializable] 
	public class Script : Model
	{
		[Link] Clock Clock;
		[Link] Soils.Soil Soil;
		[Link] Models.SurfaceOM.SurfaceOrganicMatter SOM;
		[Link] Weather Met;
		[Link] Fertiliser Fert;
		[Link] Irrigation Irrig;
		[Link] Plant Slurp;
		[Link] Zone zone;
					
		[XmlIgnore] public bool InitialDay { get; set; }
	
		
		[XmlIgnore] public double AccumEO { get; set; }
		[XmlIgnore] public double AccumEP { get; set; }
		[XmlIgnore] public double AccumES { get; set; }
		[XmlIgnore] public double AccumDrainage { get; set; }
		[XmlIgnore] public double AccumRunoff { get; set; }
		[XmlIgnore] public double AccumOutflowLat { get; set; }
		[XmlIgnore] public double AccumIrrigation { get; set; }
		[XmlIgnore] public double AccumRainfall { get; set; }
		[XmlIgnore] public double SoilWaterDeficit { get; set; }
	
		[XmlIgnore] public double OutFlowLat { get; set; }

		[EventSubscribe("Commencing")]
		private void OnSimulationCommencing(object sender, EventArgs e)
		{
			InitialDay = true;
		}
		
		[EventSubscribe("DoManagement")]
		private void OnDoManagement(object sender, EventArgs e)
		{
			//!!!!!! Water balance components !!!!!!
			//!!!!!!^^^^^^^^^^^^^^^^^^^^^^^^^^!!!!!!

			AccumIrrigation += Irrig.IrrigationApplied;
			AccumRainfall += Met.Rain;
			AccumEP -= (double)zone.Get("Slurp.Root.WaterUptake");
			double OutFlowLat = MathUtilities.Sum(Soil.SoilWater.outflow_lat);
			AccumOutflowLat -= OutFlowLat;
		}
		
		[EventSubscribe("DoManagementCalculations")]
		private void OnDoManagementCalculations(object sender, EventArgs e)
		{
			AccumEO -= Soil.SoilWater.Eo;
			AccumES -= Soil.SoilWater.Es; 
			AccumDrainage -= Soil.SoilWater.Drainage;
			AccumRunoff -= Soil.SoilWater.Runoff;
		}
	}
}
```
          Manager SlurpSowingRule
            CultivarName = Lucerne
            InitialRootDepth = 15
            SowingDate = 2011-03-14
```csharp
using System;
using Models.Core;
using Models.PMF;
using APSIM.Shared.Utilities;
        
namespace Models
{
	[Serializable] 
	[System.Xml.Serialization.XmlInclude(typeof(Model))]
	public class Script : Model
	{
		[Link] Plant Slurp;
		[Link] Clock Clock;
		[Link] Zone zone;

		[Description("Cultivar")]
		public string CultivarName { get; set; }
		[Description("Initial Root Depth")]
		public double InitialRootDepth { get; set; }
		[Description("Sowing Date")]
		public DateTime SowingDate { get; set; }

               
		[EventSubscribe("DoManagement")]
		private void OnDoManagement(object sender, EventArgs e)
		{
			if (Clock.Today.Date == SowingDate)
			{
				Slurp.Sow(cultivar: CultivarName, population: 1, depth: InitialRootDepth, rowSpacing: 150);
				object LeafPartFrac = 0.8;
				zone.Set("Slurp.Leaf.DMDemandFunction.PartitionFraction.Value", LeafPartFrac);
				object RootPartFrac = 0.2;
				zone.Set("Slurp.Root.PartitionFraction.Value", RootPartFrac);
			}
			//Potato.Sow(... Contains the following arguements:
			//Population  double  Optional  Seeds sowing/m2.  Default is zero
			//Cultivar    string  Required  "NameOfCultivar"
			//Depth       double  Optional  Depth (mm) seed sown.   Default is 100mm 
			//MaxCover    double  Optional  Proportion (0-1) of the ground row crop will cover.   Default is 1.0
			//BudNumber   double  Optional  Number of mainstems per seed sown.  Default is 1.0
			//RowSpacing  double  Optional  Spaceing (mm) between drill rows when crop is sown.  Default is 150mm
			//CropClass   string  Optional  Crop class to instantiate when crop is sown.  Default is "Plant"
		}
	}
}
```
          Report: EventNames=[Clock].DoReport
            VariableNames:
              [Clock].Today
              [Soil].SoilWater.Eo
              [Soil].SoilWater.Es
              [ExtraVariables].Script.SWC
              [ExtraVariables].Script.DUL
              [Soil].SoilWater.Drainage
              [Soil].SoilWater.Runoff
              [ExtraVariables].Script.OutFlowLat
              [Soil].SoilWater.pond
              [ExtraVariables].Script.AccumEO
              [ExtraVariables].Script.AccumEP
              [ExtraVariables].Script.AccumES
              [ExtraVariables].Script.AccumDrainage
              [ExtraVariables].Script.AccumRunoff
              [ExtraVariables].Script.AccumRainfall
              [ExtraVariables].Script.AccumIrrigation
              [ExtraVariables].Script.AccumOutflowLat
              [ExtraVariables].Script.SoilWaterDeficit
              [Soil].MultiPoreWater.WaterExtraction
              [Slurp].Leaf.PotentialEP
              [Slurp].Leaf.WaterDemand
              [Slurp].Root.Depth
              [Slurp].Leaf.CoverTotal
              [Slurp].Leaf.LAI
              [Slurp].Leaf.Height
              [Soil].SoilWater.SW
              [MicroClimate].net_radn
              [MicroClimate].peta
              [MicroClimate].petr
              [SetLAIofCrop].Script.leaflai
              sum([Soil].ObservedSWLayering.SWmm) as PSWC
              SetCropVariables.Script.Treatment
              SetCropVariables.Script.CoverRead
              SetCropVariables.Script.Cover as Cover
              [Slurp].Root.LengthDensity
              [Soil].ObservedSWLayering.SW
              [Soil].ObservedSWLayering.SWmm
          Manager SetCropVariables
            CoverFile = %root%\Tests\Validation\Slurp\ShallowSoilTest\CoverInterpolated.csv
            Ext_coef = 0.8
            MaximumHeight = 600
            Cover =
            Irrigation =
            Treatment =
            leaflai = 0
```csharp
using System;
using Models.Core;
using System.Collections.Generic;
using System.Text;
using Models.PMF;
using Models;
using System.Xml.Serialization;
using APSIM.Shared.Utilities;
using System.Data;

namespace Models
{
	[Serializable] 
	//[System.Xml.Serialization.XmlInclude(typeof(Model))]
	public class Script : Model
	{
		[Link] Plant SCRUM;
		[Link] Clock Clock;
		[Link] Zone zone;
		[Link] Simulation Simulation;
		
		[Description("File of Yields")]
		public string CoverFile { get; set; }
		[Description("Extinction coefficient")]
		public  double Ext_coef { get; set; }
		[Description("Maximum height of the crop at full cover")]
		public double MaximumHeight { get; set; }
		
		[XmlIgnore] private DataTable Covers { get; set; }

		public string Cover { get; set; }
		public string Irrigation { get; set; }
		public string Treatment { get; set; }
		
		private double CoverRead { get; set; }
		public double leaflai { get; private set; }
				
		[EventSubscribe("StartOfSimulation")]
		private void OnStartOfSimulation(object sender, EventArgs e)
		{
			
			Treatment = Cover + "_" + Irrigation;
			
			string fullFileName = PathUtilities.GetAbsolutePath(CoverFile, Simulation.FileName);
            
			ApsimTextFile textFile = new ApsimTextFile();
			textFile.Open(fullFileName);
			Covers = textFile.ToTable();
			textFile.Close();
		}
		
		[EventSubscribe("StartOfDay")]
		private void OnStartOfDay(object sender, EventArgs e)
		{
			foreach (DataRow row in Covers.Rows)
			{
				DateTime TodayDate = Convert.ToDateTime(row["Date"]);
				if (TodayDate.Date == Clock.Today.Date)
				{
					CoverRead = Convert.ToDouble(row[Treatment]);
				}
			}
		
			if ((bool)zone.Get("Slurp.IsAlive") == true)
			{
				//Only assign cover valuse if crop is emerged
				
				if (CoverRead == 1)
					leaflai = Math.Log(0.01) / -Ext_coef;
				else
				{
					if (CoverRead > 0)
						leaflai = Math.Log(1 - CoverRead) / -Ext_coef;
					else
						leaflai = 0;
				}
				//Summary.WriteMessage(this, "LAI " + leaflai);
				object LAIResetValue = leaflai;
				zone.Set("Slurp.Leaf.LAIFunction.Value", LAIResetValue);  
				object HeightResetValue = CoverRead * MaximumHeight;
				zone.Set("Slurp.Leaf.HeightFunction.Value", HeightResetValue);  
			}
		}
	}
}
```
    Experiment Residues
      Factors
        Factor Cover: Specifications=[SurfaceOrganicMatter]
          Factor StandingStubble
            Specifications:
              [SurfaceOrganicMatter]
              [InitialWater]
            SurfaceOrganicMatter: PoolName=Barley; type=Barley; mass=2026; standing_fraction=1; cnr=80; CriticalResidueWeight=2000; OptimumDecompTemp=20; MaxCumulativeEOS=20; CNRatioDecompCoeff=0.277; CNRatioDecompThreshold=25; TotalLeachRain=25; MinRainToLeach=10; CriticalMinimumOrganicC=0.004; DefaultCPRatio=0; DefaultStandingFraction=0; StandingExtinctCoeff=0.5; FractionFaecesAdded=0.5
              Pools:
                {PoolName=Barley, ResidueType=Barley, Mass=2026, CNRatio=80, StandingFraction=1}
              ResidueTypes: LoadFromResource=ResidueTypes
            Sample InitialWater: Thickness=[50, 150, 200, 200, 200, 200, 200, 200]; SW=[0.27, 0.27, 0.25, 0.25, 0.2, 0.25, 0.25, 0.25]; NO3Units=ppm; NH4Units=ppm; SWUnits=Volumetric; OCUnits=Total; PHUnits=Water
          Factor HarvesterWindrow
            Specifications:
              [SurfaceOrganicMatter]
              [InitialWater]
            SurfaceOrganicMatter: PoolName=Barley; type=Barley; mass=8300; standing_fraction=0; cnr=80; CriticalResidueWeight=2000; OptimumDecompTemp=20; MaxCumulativeEOS=20; CNRatioDecompCoeff=0.277; CNRatioDecompThreshold=25; TotalLeachRain=25; MinRainToLeach=10; CriticalMinimumOrganicC=0.004; DefaultCPRatio=0; DefaultStandingFraction=0; StandingExtinctCoeff=0.5; FractionFaecesAdded=0.5
              Pools:
                {PoolName=Barley, ResidueType=Barley, Mass=8300, CNRatio=80, StandingFraction=0}
              ResidueTypes: LoadFromResource=ResidueTypes
            Sample InitialWater: Thickness=[50, 150, 200, 200, 200, 200, 200, 200]; SW=[0.22, 0.26, 0.18, 0.14, 0.14, 0.14, 0.14, 0.14]; NO3Units=ppm; NH4Units=ppm; SWUnits=Volumetric; OCUnits=Total; PHUnits=Water
          Factor MownStubble
            Specifications:
              [SurfaceOrganicMatter]
              [InitialWater]
            SurfaceOrganicMatter: PoolName=Barley; type=Barley; mass=400; standing_fraction=1; cnr=80; CriticalResidueWeight=2000; OptimumDecompTemp=20; MaxCumulativeEOS=20; CNRatioDecompCoeff=0.277; CNRatioDecompThreshold=25; TotalLeachRain=25; MinRainToLeach=10; CriticalMinimumOrganicC=0.004; DefaultCPRatio=0; DefaultStandingFraction=0; StandingExtinctCoeff=0.5; FractionFaecesAdded=0.5
              Pools:
                {PoolName=Barley, ResidueType=Barley, Mass=400, CNRatio=80, StandingFraction=1}
              ResidueTypes: LoadFromResource=ResidueTypes
            Sample InitialWater: Thickness=[50, 150, 200, 200, 200, 200, 200, 200]; SW=[0.22, 0.27, 0.16, 0.14, 0.14, 0.14, 0.14, 0.14]; NO3Units=ppm; NH4Units=ppm; SWUnits=Volumetric; OCUnits=Total; PHUnits=Water
          Factor BareSoil
            Specifications:
              [SurfaceOrganicMatter]
              [InitialWater]
            SurfaceOrganicMatter: PoolName=Barley; type=Barley; mass=0; standing_fraction=1; cnr=80; CriticalResidueWeight=2000; OptimumDecompTemp=20; MaxCumulativeEOS=20; CNRatioDecompCoeff=0.277; CNRatioDecompThreshold=25; TotalLeachRain=25; MinRainToLeach=10; CriticalMinimumOrganicC=0.004; DefaultCPRatio=0; DefaultStandingFraction=0; StandingExtinctCoeff=0.5; FractionFaecesAdded=0.5
              Pools:
                {PoolName=Barley, ResidueType=Barley, Mass=0, CNRatio=80, StandingFraction=1}
              ResidueTypes: LoadFromResource=ResidueTypes
            Sample InitialWater: Thickness=[50, 150, 200, 200, 200, 200, 200, 200]; SW=[0.2, 0.25, 0.16, 0.14, 0.14, 0.14, 0.14, 0.14]; NO3Units=ppm; NH4Units=ppm; SWUnits=Volumetric; OCUnits=Total; PHUnits=Water
      Simulation Base
        Weather: FileName=lincoln.met
        Clock: StartDate=2010-02-25; EndDate=2010-08-11
        Summary
        Zone Field: Area=1; Slope=0
          Soil: ASCOrder=Vertosol; ASCSubOrder=Black; SoilType=Clay; Site=Norwin; NearestTown=Norwin; Region=Darling Downs and Granite Belt; State=Queensland; Country=Australia; NaturalVegetation=Qld. Bluegrass, possible Qld. Blue gum; ApsoilNumber=900; Latitude=-27.581836; Longitude=151.320206; LocationAccuracy=+/- 20m
            DataSource=CSIRO Sustainable Ecosystems, Toowoomba; Characteriesd as part of the GRDC funded project"Doing it better, doing it smarter, managing soil water in Australian agriculture' 2011
            Comments=OC, CLL for all crops estimated-based on Bongeen Mywybilla Soil No1
            MultiPoreWater: Salb=0.15; SubProfileConductance=20; WaterTableDepth=10; CalculateInfiltration=true; CalculateDrainage=true; ReportDetail=false; IncludeSorption=true; CalculateEvaporation=true; CalculateDiffusion=true; DiffusivityMultiplier=2; ExtractionMultiplier=0; ProfileWaterExtraction=0; TotalCover=0; ResidueWater=0; Hour=0; ReportLayer=0; TimeStep=0
              Thickness  ParamThickness  LL15  DUL   SAT   CFlow  XFlow  PsiBub  MaxRepellentWC  MinRepellentWC  MinRepellancyFactor  BD
              30         30              0.16  0.3   0.44  7E-11  3      -20     0.8             0.2             1                    1
              170        170             0.15  0.3   0.44  7E-11  3      -20     0.8             0.2             1                    1
              200        200             0.14  0.28  0.46  7E-11  3      -70     0.8             0.2             1                    1.2
              200        200             0.14  0.28  0.46  7E-11  3      -70     0.8             0.2             1                    1.2
              200        200             0.14  0.26  0.36  7E-11  3      -70     0.8             0.2             1                    1.3
              200        200             0.14  0.26  0.36  7E-11  3      -70     0.8             0.2             1                    1.4
              200        200             0.14  0.26  0.36  7E-11  3      -70     0.8             0.2             1                    1.5
              200        200             0.14  0.26  0.36  7E-11  3      -70     0.8             0.2             1                    1.6
            LayerStructure: Thickness=[30, 170, 200, 200, 200, 200, 200, 200]
            Evapotranspiration
            MRSpline
            SoilNitrogen: fom_type=[default, manure, mucuna, lablab, shemp, stable]; fract_carb=[0.2, 0.3, 0.54, 0.57, 0.45, 0]; fract_cell=[0.7, 0.3, 0.37, 0.37, 0.47, 0.1]; fract_lign=[0.1, 0.4, 0.09, 0.06, 0.08, 0.9]; wfpsN2N2O_x=[22, 88]; wfpsN2N2O_y=[0.1, 1]
            SoilOrganicMatter: RootCN=40; RootWt=1000; SoilCN=11; EnrACoeff=7.4; EnrBCoeff=0.2; OCUnits=Total
              Thickness  OC    FBiom  FInert
              200        2.63  0.03   0.4
              200        1.25  0.02   0.7
              200        0.32  0.01   0.8
              200        0.21  0.01   0.9
              200        0.2   0.01   1
              200        0.2   0.01   1
              200        0.2   0.01   1
            Analysis: Thickness=[200, 200, 200, 200, 200, 200, 200]; PH=[6, 6, 6, 6, 6, 6, 6]; PHUnits=Water; BoronUnits=HotWater
            Sample InitialN: NO3Units=ppm; NH4Units=ppm; SWUnits=Volumetric; OCUnits=Total; PHUnits=Water
              Thickness  NO3  NH4
              150        10   0.1
              150        10   0.1
              300        10   0.1
              300        10   0.1
              300        10   0.1
              300        1    0.1
              300        1    0.1
            Sample InitialWater: Thickness=[50, 150, 200, 200, 200, 200, 200, 200]; SW=[0.27, 0.27, 0.25, 0.25, 0.2, 0.25, 0.25, 0.25]; NO3Units=ppm; NH4Units=ppm; SWUnits=Volumetric; OCUnits=Total; PHUnits=Water
            WEIRDO MultiPoreWater: Salb=0.15; SubProfileConductance=20; WaterTableDepth=10; CalculateInfiltration=true; CalculateDrainage=true; ReportDetail=false; IncludeSorption=true; CalculateEvaporation=true; CalculateDiffusion=true; DiffusivityMultiplier=2; ExtractionMultiplier=0; ProfileWaterExtraction=0; TotalCover=0; ResidueWater=0; Hour=0; ReportLayer=0; TimeStep=0
              Thickness  ParamThickness  LL15  DUL   SAT   CFlow  XFlow  PsiBub  MaxRepellentWC  MinRepellentWC  MinRepellancyFactor  BD
              30         30              0.16  0.3   0.44  7E-11  3      -20     0.8             0.2             1                    1
              170        170             0.15  0.3   0.44  7E-11  3      -20     0.8             0.2             1                    1
              200        200             0.14  0.28  0.46  7E-11  3      -70     0.8             0.2             1                    1.2
              200        200             0.14  0.28  0.46  7E-11  3      -70     0.8             0.2             1                    1.2
              200        200             0.14  0.26  0.36  7E-11  3      -70     0.8             0.2             1                    1.3
              200        200             0.14  0.26  0.36  7E-11  3      -70     0.8             0.2             1                    1.4
              200        200             0.14  0.26  0.36  7E-11  3      -70     0.8             0.2             1                    1.5
              200        200             0.14  0.26  0.36  7E-11  3      -70     0.8             0.2             1                    1.6
          Irrigation
          Fertiliser
          SurfaceOrganicMatter: same as Validation.Residues.Factors.Cover.StandingStubble.SurfaceOrganicMatter
          MicroClimate: a_interception=0; b_interception=1; c_interception=0; d_interception=0; soil_albedo=0.3; sun_angle=15; soil_heat_flux_fraction=0.4; night_interception_fraction=0.5; refheight=2; albedo=0.293662; emissivity=0.96; RadIntTotal=0
          Report
            VariableNames:
              [Clock].Today
              [SurfaceOrganicMatter].Cover
              [SurfaceOrganicMatter].Wt
              [Soil].SoilWater.SWmm
              [Weather].Rain
              [Soil].Thickness
              [Soil].SoilWater.Eos
              [Soil].SoilWater.Es
              [Irrigation].IrrigationApplied
              [Soil].SoilWater.SW
              [Soil].SoilWater.Runoff
              [Soil].SoilWater.Infiltration
              [Soil].SoilWater.Drainage
              [Soil].SoilWater.LL15
              [Soil].SoilWater.DUL
              [Soil].SoilWater.LL15mm
              [Soil].SoilWater.DULmm
              sum([Soil].SoilWater.SWmm[1:4]) as ProfileWater
              sum([Soil].SoilWater.SWmm[1:2]) as Water1
              sum([Soil].SoilWater.SWmm) as TotalProfileWater
              sum([Soil].SoilWater.SWmm[1:2])/200 as WC1
              [ExtraVariables].Script.SWDep60
              [ExtraVariables].Script.FomN
              [ExtraVariables].Script.HumN
              [ExtraVariables].Script.BiomN
              [ExtraVariables].Script.DltNMinRes
              [ExtraVariables].Script.DltNMinTot
              [ExtraVariables].Script.AccumPlantN
              [ExtraVariables].Script.AccumMineralisation
              [ExtraVariables].Script.AccumDenit
              [ExtraVariables].Script.AccumFert
              [ExtraVariables].Script.AccumLeach
              [ExtraVariables].Script.AccumDetach
              [ExtraVariables].Script.DeltaSoilOMN
              [ExtraVariables].Script.DeltaSurfaceOMN
              [ExtraVariables].Script.DeltaSoilMineralN
              [ExtraVariables].Script.AccumEO
              [ExtraVariables].Script.AccumEP
              [ExtraVariables].Script.AccumES
              [ExtraVariables].Script.AccumDrainage
              [ExtraVariables].Script.AccumRunoff
              [ExtraVariables].Script.AccumRainfall
              [ExtraVariables].Script.AccumIrrigation
              [ExtraVariables].Script.AccumOutflowLat
              [ExtraVariables].Script.SoilWaterDeficit
              [Soil].SoilNitrogen.Denitrification
              [ExtraVariables].Script.MineralN
              [Soil].NO3N
              [Soil].NH4N
              [Soil].SoilNitrogen.urea
              [Soil].MultiPoreWater.DUL
              [Soil].SoilWater.Diffusion
              [Soil].SoilWater.SWdailyMax
              [Soil].SoilWater.SWmmdailyMax
            EventNames:
              [Clock].DoReport
          Operations
            2010-03-05  [Irrigation].Apply(26.6);
            2010-03-08  [Irrigation].Apply(30.4);
            2010-03-09  [Irrigation].Apply(100);
            2010-03-12  [Irrigation].Apply(10);
          Manager ExtraVariables
```csharp
using System;
using Models.Core;
using System.Collections.Generic;
using System.Text;
using Models.Soils;
using Models;
using System.Xml.Serialization;
using APSIM.Shared.Utilities;

namespace Models
{
	[Serializable] 
	public class Script : Model
	{
		[Link] Clock Clock;
		[Link] Soils.Soil Soil;
		[Link] Models.SurfaceOM.SurfaceOrganicMatter SOM;
		[Link] Weather Met;
		[Link] Fertiliser Fert;
		[Link] Irrigation Irrig;
					
		[XmlIgnore] public bool InitialDay { get; set; }
		
		[XmlIgnore] public double AccumPlantN { get; set; }
		[XmlIgnore] public double AccumMineralisation { get; set; }
		[XmlIgnore] public double AccumDenit { get; set; }
		[XmlIgnore] public double AccumFert { get; set; }
		[XmlIgnore] public double AccumLeach { get; set; }
		[XmlIgnore] public double AccumDetach { get; set; }
		[XmlIgnore] public double DeltaSoilOMN { get; set; }
		[XmlIgnore] public double DeltaSurfaceOMN { get; set; }
		[XmlIgnore] public double DeltaSoilMineralN { get; set; }
		[XmlIgnore] public double SoilNitrogenContent { get; set; }
		
		[XmlIgnore] public double AccumEO { get; set; }
		[XmlIgnore] public double AccumEP { get; set; }
		[XmlIgnore] public double AccumES { get; set; }
		[XmlIgnore] public double AccumDrainage { get; set; }
		[XmlIgnore] public double AccumRunoff { get; set; }
		[XmlIgnore] public double AccumOutflowLat { get; set; }
		[XmlIgnore] public double AccumIrrigation { get; set; }
		[XmlIgnore] public double AccumRainfall { get; set; }
		[XmlIgnore] public double SoilWaterDeficit { get; set; }
		
		[XmlIgnore] public double AccumTtemerg { get; set; }
		
		[XmlIgnore] public double  InitialSoilOMN { get; set; }
		[XmlIgnore] public double  InitialSurfaceOMN { get; set; }
		[XmlIgnore] public double  InitialMineralN { get; set; }
		
		[XmlIgnore] public double SWC { get; set; }
		[XmlIgnore] public double DUL { get; set; }
		[XmlIgnore] public double OutFlowLat { get; set; }
		[XmlIgnore] public double SWDep60 { get; set; }
		[XmlIgnore] public double Flux1 { get; set; }
		[XmlIgnore] public double Flux3 { get; set; }
		
		[XmlIgnore] public double FomN { get; set; }
		[XmlIgnore] public double BiomN { get; set; }
		[XmlIgnore] public double HumN { get; set; }
		[XmlIgnore] public double OrganicN { get; set; }
		[XmlIgnore] public double NO3N { get; set; }
		[XmlIgnore] public double NH4N { get; set; }
		[XmlIgnore] public double UreaN { get; set; }
		[XmlIgnore] public double MineralN { get; set; }
		[XmlIgnore] public double DltNMinRes { get; set; }
		[XmlIgnore] public double DltNMinTot { get; set; }
		
		[EventSubscribe("Commencing")]
		private void OnSimulationCommencing(object sender, EventArgs e)
		{
			InitialDay = true;
		}
		
		[EventSubscribe("DoManagement")]
		private void OnDoManagement(object sender, EventArgs e)
		{
			//!!!!!! Nitrogen balance components !!!!!!
			//!!!!!!^^^^^^^^^^^^^^^^^^^^^^^^^^^^^!!!!!!
			FomN = MathUtilities.Sum(Soil.SoilNitrogen.FOMN);
			HumN = MathUtilities.Sum(Soil.SoilNitrogen.HumicN);
			BiomN = MathUtilities.Sum(Soil.SoilNitrogen.MicrobialN);
			OrganicN = FomN + HumN + BiomN;
			NO3N = MathUtilities.Sum(Soil.NO3N);
			NH4N = MathUtilities.Sum(Soil.NH4N);
			UreaN = MathUtilities.Sum(Soil.SoilNitrogen.urea);
			MineralN = NO3N + NH4N + UreaN; 
			DltNMinRes = MathUtilities.Sum(Soil.SoilNitrogen.dlt_n_min_res);
			DltNMinTot = MathUtilities.Sum(Soil.SoilNitrogen.MineralisedN);
			int layers = Soil.Thickness.Length;
			if (InitialDay == true)
			{
				InitialSurfaceOMN = SOM.N;
				InitialSoilOMN = OrganicN;
				InitialMineralN = MineralN;
				InitialDay = false;
			}
			AccumFert += Fert.NitrogenApplied;
			DeltaSurfaceOMN = SOM.N - InitialSurfaceOMN;
			AccumLeach = AccumLeach - Soil.SoilWater.LeachNH4 - Soil.SoilWater.LeachNO3 - Soil.SoilWater.LeachUrea; //Fails
			AccumMineralisation += MathUtilities.Sum(Soil.SoilNitrogen.MineralisedN);
			AccumDenit -= MathUtilities.Sum(Soil.SoilNitrogen.Denitrification);
			DeltaSoilOMN = OrganicN - InitialSoilOMN;
			DeltaSoilMineralN = MineralN - InitialMineralN;
			SoilNitrogenContent = MineralN;
			
			//!!!!!! Water balance components !!!!!!
			//!!!!!!^^^^^^^^^^^^^^^^^^^^^^^^^^!!!!!!

			AccumIrrigation += Irrig.IrrigationApplied; 
			AccumRainfall += Met.Rain;
			SWDep60 = 0;
			SWC = MathUtilities.Sum(Soil.SoilWater.SWmm);
			DUL = MathUtilities.Sum(Soil.SoilWater.DULmm);
			SoilWaterDeficit = (SWC - DUL);
			double OutFlowLat = MathUtilities.Sum(Soil.SoilWater.outflow_lat);
			AccumOutflowLat -= OutFlowLat;
			SWDep60 = Soil.SoilWater.SWmm[0] + Soil.SoilWater.SWmm[1] + Soil.SoilWater.SWmm[2];
		}
		
		[EventSubscribe("DoManagementCalculations")]
		private void OnDoManagementCalculations(object sender, EventArgs e)
		{
			int layers = Soil.Thickness.Length;			
			AccumEO -= Soil.SoilWater.Eo;
			AccumES -= Soil.SoilWater.Es; 
			AccumDrainage -= Soil.SoilWater.Drainage;
			AccumRunoff -= Soil.SoilWater.Runoff;
		}
	}
}
```
          Report Params: EventNames=[Clock].StartOfSimulation
            VariableNames:
              [Clock].Today
              [Soil].SoilWater.HydraulicConductivityIn
              [Soil].SoilWater.PsiUpper
  Folder Sensibility
    Experiment Transpiration
      Factors
        Factor Plant: Specifications=[SlurpSowingRule].Script.SowDate = 5-Sep,5-Dec
        Factor Conductivity
          Factor High: Specifications=[MultiPoreWater]
            MultiPoreWater: Salb=0.15; SubProfileConductance=100; WaterTableDepth=10; CalculateInfiltration=true; CalculateDrainage=true; ReportDetail=false; IncludeSorption=true; CalculateEvaporation=false; CalculateDiffusion=true; DiffusivityMultiplier=2; ExtractionMultiplier=10; ProfileWaterExtraction=0; TotalCover=0; ResidueWater=0; Hour=0; ReportLayer=0; TimeStep=0
              Thickness  ParamThickness  LL15  DUL  SAT   CFlow  XFlow  PsiBub  MaxRepellentWC  MinRepellentWC  MinRepellancyFactor  BD
              30         30              0.15  0.3  0.44  6E-12  3.9    -20     0.8             0.2             1                    1
              170        170             0.15  0.3  0.44  6E-12  3.9    -20     0.8             0.2             1                    1
              200        200             0.15  0.3  0.44  6E-12  3.9    -20     0.8             0.2             1                    1.2
              200        200             0.15  0.3  0.44  6E-12  3.9    -20     0.8             0.2             1                    1.2
              200        200             0.15  0.3  0.44  6E-12  3.9    -20     0.8             0.2             1                    1.3
              200        200             0.15  0.3  0.44  6E-12  3.9    -20     0.8             0.2             1                    1.4
              200        200             0.15  0.3  0.44  6E-12  3.9    -20     0.8             0.2             1                    1.5
              200        200             0.15  0.3  0.44  6E-12  3.9    -20     0.8             0.2             1                    1.6
          Factor Mid: Specifications=[MultiPoreWater]
            MultiPoreWater: Salb=0.15; SubProfileConductance=100; WaterTableDepth=10; CalculateInfiltration=true; CalculateDrainage=true; ReportDetail=false; IncludeSorption=true; CalculateEvaporation=false; CalculateDiffusion=true; DiffusivityMultiplier=2; ExtractionMultiplier=10; ProfileWaterExtraction=0; TotalCover=0; ResidueWater=0; Hour=0; ReportLayer=0; TimeStep=0
              Thickness  ParamThickness  LL15  DUL  SAT   CFlow  XFlow  PsiBub  MaxRepellentWC  MinRepellentWC  MinRepellancyFactor  BD
              30         30              0.15  0.3  0.44  6E-12  3.4    -20     0.8             0.2             1                    1
              170        170             0.15  0.3  0.44  6E-12  3.4    -20     0.8             0.2             1                    1
              200        200             0.15  0.3  0.44  6E-12  3.4    -20     0.8             0.2             1                    1.2
              200        200             0.15  0.3  0.44  6E-12  3.4    -20     0.8             0.2             1                    1.2
              200        200             0.15  0.3  0.44  6E-12  3.4    -20     0.8             0.2             1                    1.3
              200        200             0.15  0.3  0.44  6E-12  3.4    -20     0.8             0.2             1                    1.4
              200        200             0.15  0.3  0.44  6E-12  3.4    -20     0.8             0.2             1                    1.5
              200        200             0.15  0.3  0.44  6E-12  3.4    -20     0.8             0.2             1                    1.6
          Factor Low: Specifications=[MultiPoreWater]
            MultiPoreWater: Salb=0.15; SubProfileConductance=100; WaterTableDepth=10; CalculateInfiltration=true; CalculateDrainage=true; ReportDetail=false; IncludeSorption=true; CalculateEvaporation=false; CalculateDiffusion=true; DiffusivityMultiplier=2; ExtractionMultiplier=10; ProfileWaterExtraction=0; TotalCover=0; ResidueWater=0; Hour=0; ReportLayer=0; TimeStep=0
              Thickness  ParamThickness  LL15  DUL  SAT   CFlow  XFlow  PsiBub  MaxRepellentWC  MinRepellentWC  MinRepellancyFactor  BD
              30         30              0.15  0.3  0.44  6E-12  3      -20     0.8             0.2             1                    1
              170        170             0.15  0.3  0.44  6E-12  3      -20     0.8             0.2             1                    1
              200        200             0.15  0.3  0.44  6E-12  3      -20     0.8             0.2             1                    1.2
              200        200             0.15  0.3  0.44  6E-12  3      -20     0.8             0.2             1                    1.2
              200        200             0.15  0.3  0.44  6E-12  3      -20     0.8             0.2             1                    1.3
              200        200             0.15  0.3  0.44  6E-12  3      -20     0.8             0.2             1                    1.4
              200        200             0.15  0.3  0.44  6E-12  3      -20     0.8             0.2             1                    1.5
              200        200             0.15  0.3  0.44  6E-12  3      -20     0.8             0.2             1                    1.6
      Simulation BaseTranspiration
        Clock: StartDate=1998-09-01; EndDate=1999-12-31
        Weather: FileName=lincoln.met
        Summary SummaryFile
        SoilArbitrator Soil Arbitrator
        Zone Field: Area=1; Slope=0
          Report: EventNames=[Clock].DoReport
            VariableNames:
              [Clock].Today
              [IWeather].MaxT
              [IWeather].MinT
              [IWeather].Rain
              [IWeather].Radn
              [IWeather].Wind
              [IWeather].DayLength
              [IWeather].VP
              [IWeather].CO2
              [IWeather].RainfallHours
              sum([Soil].SoilWater.SWmm) as ProfileWater
              [Soil].SoilWater.SWmm
              [Soil].SoilWater.SW
              [Soil].MultiPoreWater.Water
              [Soil].MultiPoreWater.Drainage
              [Soil].MultiPoreWater.Infiltration
              [Soil].MultiPoreWater.pond
              [Soil].MultiPoreWater.DUL
              [Soil].MultiPoreWater.SAT
              [Irrigation].IrrigationApplied
              [Soil].MultiPoreWater.DeltaPond + [Soil].MultiPoreWater.Infiltration + [Soil].MultiPoreWater.Drainage as Check
              [Soil].SoilWater.Es
              [Soil].SoilWater.Eos
              [Slurp].Leaf.CoverTotal
              [Slurp].Root.Depth
              [Soil].MultiPoreWater.WaterExtraction
              [Slurp].Leaf.PotentialEP
              [Slurp].Root.LengthDensity
              [Soil].MultiPoreWater.PoreWater
              [Slurp].Root.Wt
          Fertiliser
          SurfaceOrganicMatter: PoolName=wheat_stubble; type=wheat; mass=0; standing_fraction=0; cnr=100; CriticalResidueWeight=2000; OptimumDecompTemp=20; MaxCumulativeEOS=20; CNRatioDecompCoeff=0.277; CNRatioDecompThreshold=25; TotalLeachRain=25; MinRainToLeach=10; CriticalMinimumOrganicC=0.004; DefaultCPRatio=0; DefaultStandingFraction=0; StandingExtinctCoeff=0.5; FractionFaecesAdded=0.5
            Pools:
              {PoolName=wheat_stubble, ResidueType=wheat, Mass=0, CNRatio=100, StandingFraction=0}
            ResidueTypes: LoadFromResource=ResidueTypes
          MicroClimate: a_interception=0; b_interception=1; c_interception=0; d_interception=0; soil_albedo=0.3; sun_angle=15; soil_heat_flux_fraction=0.4; night_interception_fraction=0.5; refheight=2; albedo=0.15; emissivity=0.96; RadIntTotal=0
          Irrigation
          Manager ClimateControl
```csharp
using System;
using Models.Core;
using APSIM.Shared.Utilities;



using System.Collections.Generic;
using System.Text;
using Models.PMF;
using Models;
using System.Xml.Serialization;

namespace Models
{
	[Serializable] 
	[System.Xml.Serialization.XmlInclude(typeof(Model))]
	public class Script : Model
	{
		[Link] Weather Met;
		[Link] Clock Clock;
    
		[EventSubscribe("PreparingNewWeatherData")]
		private void OnPreparingNewWeatherData(object sender, EventArgs e)
		{
			Met.Rain = 0;	
			Met.MaxT = 15;
			Met.MinT = 5;
			Met.Radn = 10;
			Met.VP = 5;
			Met.Wind = 1;
		}
	}
}
```
          Plant Slurp: CropType=Slurp
          Manager SlurpSowingRule
            CultivarName = Pasture
            InitialRootDepth = 20
            SowDate =
```csharp
using System;
using Models.Core;
using Models.PMF;
using APSIM.Shared.Utilities;
        
namespace Models
{
	[Serializable] 
	[System.Xml.Serialization.XmlInclude(typeof(Model))]
	public class Script : Model
	{
		[Link] Plant Slurp;
		[Link] Clock Clock;
		[Link] Zone zone;
		[Display(DisplayType = DisplayAttribute.DisplayTypeEnum.CultivarName)]
		[Description("Cultivar")]
		public string CultivarName { get; set; }
		[Description("Initial Root Depth")]
		public double InitialRootDepth { get; set; }
		[Description("Sowing date (d-mmm)")]
		public string SowDate { get; set; }

               
		[EventSubscribe("DoManagement")]
		private void OnDoManagement(object sender, EventArgs e)
		{
			if (DateUtilities.WithinDates(SowDate, Clock.Today, SowDate))
			{
				Slurp.Sow(cultivar: CultivarName, population: 1, depth: InitialRootDepth, rowSpacing: 150);
				object LeafPartFrac = 0.2;
				zone.Set("Slurp.Leaf.DMDemandFunction.PartitionFraction.Value", LeafPartFrac);
				object RootPartFrac = 0.8;
				zone.Set("Slurp.Root.PartitionFraction.Value", RootPartFrac);
			}
			//Potato.Sow(... Contains the following arguements:
			//Population  double  Optional  Seeds sowing/m2.  Default is zero
			//Cultivar    string  Required  "NameOfCultivar"
			//Depth       double  Optional  Depth (mm) seed sown.   Default is 100mm 
			//MaxCover    double  Optional  Proportion (0-1) of the ground row crop will cover.   Default is 1.0
			//BudNumber   double  Optional  Number of mainstems per seed sown.  Default is 1.0
			//RowSpacing  double  Optional  Spaceing (mm) between drill rows when crop is sown.  Default is 150mm
			//CropClass   string  Optional  Crop class to instantiate when crop is sown.  Default is "Plant"
		}
	}
}
```
          Soil: ASCOrder=Vertosol; ASCSubOrder=Black; SoilType=Clay; Site=Norwin; NearestTown=Norwin; Region=Darling Downs and Granite Belt; State=Queensland; Country=Australia; NaturalVegetation=Qld. Bluegrass, possible Qld. Blue gum; ApsoilNumber=900; Latitude=-27.581836; Longitude=151.320206; LocationAccuracy=+/- 20m
            DataSource=CSIRO Sustainable Ecosystems, Toowoomba; Characteriesd as part of the GRDC funded project"Doing it better, doing it smarter, managing soil water in Australian agriculture' 2011
            Comments=OC, CLL for all crops estimated-based on Bongeen Mywybilla Soil No1
            MultiPoreWater: Salb=0.15; SubProfileConductance=20; WaterTableDepth=10; CalculateInfiltration=true; CalculateDrainage=true; ReportDetail=false; IncludeSorption=true; CalculateEvaporation=false; CalculateDiffusion=false; DiffusivityMultiplier=2; ExtractionMultiplier=0; ProfileWaterExtraction=0; TotalCover=0; ResidueWater=0; Hour=0; ReportLayer=0; TimeStep=0
              Thickness  ParamThickness  LL15  DUL   SAT   CFlow  XFlow  PsiBub  MaxRepellentWC  MinRepellentWC  MinRepellancyFactor  BD
              30         30              0.16  0.3   0.44  7E-11  3      -20     0.8             0.2             1                    1
              170        170             0.15  0.3   0.44  7E-11  3      -20     0.8             0.2             1                    1
              200        200             0.14  0.28  0.46  7E-11  3      -70     0.8             0.2             1                    1.2
              200        200             0.14  0.28  0.46  7E-11  3      -70     0.8             0.2             1                    1.2
              200        200             0.14  0.26  0.36  7E-11  3      -70     0.8             0.2             1                    1.3
              200        200             0.14  0.26  0.36  7E-11  3      -70     0.8             0.2             1                    1.4
              200        200             0.14  0.26  0.36  7E-11  3      -70     0.8             0.2             1                    1.5
              200        200             0.14  0.26  0.36  7E-11  3      -70     0.8             0.2             1                    1.6
            Evapotranspiration
            MRSpline
            SoilNitrogen: fom_type=[default, manure, mucuna, lablab, shemp, stable]; fract_carb=[0.2, 0.3, 0.54, 0.57, 0.45, 0]; fract_cell=[0.7, 0.3, 0.37, 0.37, 0.47, 0.1]; fract_lign=[0.1, 0.4, 0.09, 0.06, 0.08, 0.9]; wfpsN2N2O_x=[22, 88]; wfpsN2N2O_y=[0.1, 1]
            SoilOrganicMatter: same as Validation.Residues.Base.Field.Soil.SoilOrganicMatter
            Analysis: Thickness=[200, 200, 200, 200, 200, 200, 200]; PH=[6, 6, 6, 6, 6, 6, 6]; PHUnits=Water; BoronUnits=HotWater
            Sample InitialN: NO3Units=ppm; NH4Units=ppm; SWUnits=Volumetric; OCUnits=Total; PHUnits=Water
              Thickness  NO3  NH4
              150        10   0.1
              150        10   0.1
              300        10   0.1
              300        10   0.1
              300        10   0.1
              300        1    0.1
              300        1    0.1
            Sample InitialWater: Thickness=[30, 170, 200, 200, 200, 200, 200, 200]; SW=[0.3, 0.3, 0.3, 0.3, 0.3, 0.3, 0.3, 0.3]; NO3Units=ppm; NH4Units=ppm; SWUnits=Volumetric; OCUnits=Total; PHUnits=Water
            LayerStructure
              Thickness=[30, 70, 50, 50, 50, 50, 50, 50, 50, 50, 50, 50, 50, 50, 50, 50, 50, 50, 50, 50, 50, 50, 50, 50, 50, 50, 50, 50]
            ObservedSWLayering: Thickness=[200, 200, 200, 200, 200, 200, 200]
            WEIRDO MultiPoreWater: Salb=0.15; SubProfileConductance=20; WaterTableDepth=10; CalculateInfiltration=true; CalculateDrainage=true; ReportDetail=false; IncludeSorption=true; CalculateEvaporation=false; CalculateDiffusion=false; DiffusivityMultiplier=2; ExtractionMultiplier=0; ProfileWaterExtraction=0; TotalCover=0; ResidueWater=0; Hour=0; ReportLayer=0; TimeStep=0
              Thickness  ParamThickness  LL15  DUL   SAT   CFlow  XFlow  PsiBub  MaxRepellentWC  MinRepellentWC  MinRepellancyFactor  BD
              30         30              0.16  0.3   0.44  7E-11  3      -20     0.8             0.2             1                    1
              170        170             0.15  0.3   0.44  7E-11  3      -20     0.8             0.2             1                    1
              200        200             0.14  0.28  0.46  7E-11  3      -70     0.8             0.2             1                    1.2
              200        200             0.14  0.28  0.46  7E-11  3      -70     0.8             0.2             1                    1.2
              200        200             0.14  0.26  0.36  7E-11  3      -70     0.8             0.2             1                    1.3
              200        200             0.14  0.26  0.36  7E-11  3      -70     0.8             0.2             1                    1.4
              200        200             0.14  0.26  0.36  7E-11  3      -70     0.8             0.2             1                    1.5
              200        200             0.14  0.26  0.36  7E-11  3      -70     0.8             0.2             1                    1.6
    Experiment Diffusion
      Factors
        Factor WetLayer
          Factor WetTop: Specifications=[InitialWater]
            Sample WetTop: Thickness=[30, 170, 200, 200, 200, 200, 200, 200]; SW=[0.3, 0.3, 0.28, 0.28, 0.14, 0.14, 0.14, 0.14]; NO3Units=ppm; NH4Units=ppm; SWUnits=Volumetric; OCUnits=Total; PHUnits=Water
          Factor WetBot: Specifications=[InitialWater]
            Sample WetBot: Thickness=[30, 170, 200, 200, 200, 200, 200, 200]; SW=[0.16, 0.15, 0.14, 0.14, 0.26, 0.26, 0.26, 0.26]; NO3Units=ppm; NH4Units=ppm; SWUnits=Volumetric; OCUnits=Total; PHUnits=Water
        Factor Conductivity
          Factor High: Specifications=[MultiPoreWater]
            MultiPoreWater: Salb=0.15; SubProfileConductance=100; WaterTableDepth=10; CalculateInfiltration=true; CalculateDrainage=true; ReportDetail=false; IncludeSorption=true; CalculateEvaporation=false; CalculateDiffusion=true; DiffusivityMultiplier=2; ExtractionMultiplier=0; ProfileWaterExtraction=0; TotalCover=0; ResidueWater=0; Hour=0; ReportLayer=0; TimeStep=0
              Thickness  ParamThickness  LL15  DUL   SAT   CFlow  XFlow  PsiBub  MaxRepellentWC  MinRepellentWC  MinRepellancyFactor  BD
              30         30              0.16  0.3   0.44  6E-12  3.9    -20     0.8             0.2             1                    1
              170        170             0.15  0.3   0.44  6E-12  3.9    -20     0.8             0.2             1                    1
              200        200             0.14  0.28  0.46  6E-12  3.9    -70     0.8             0.2             1                    1.2
              200        200             0.14  0.28  0.46  6E-12  3.9    -70     0.8             0.2             1                    1.2
              200        200             0.14  0.26  0.36  6E-12  3.9    -70     0.8             0.2             1                    1.3
              200        200             0.14  0.26  0.36  6E-12  3.9    -70     0.8             0.2             1                    1.4
              200        200             0.14  0.26  0.36  6E-12  3.9    -70     0.8             0.2             1                    1.5
              200        200             0.14  0.26  0.36  6E-12  3.9    -70     0.8             0.2             1                    1.6
          Factor Mid: Specifications=[MultiPoreWater]
            MultiPoreWater: Salb=0.15; SubProfileConductance=100; WaterTableDepth=10; CalculateInfiltration=true; CalculateDrainage=true; ReportDetail=false; IncludeSorption=true; CalculateEvaporation=false; CalculateDiffusion=true; DiffusivityMultiplier=2; ExtractionMultiplier=0; ProfileWaterExtraction=0; TotalCover=0; ResidueWater=0; Hour=0; ReportLayer=0; TimeStep=0
              Thickness  ParamThickness  LL15  DUL   SAT   CFlow  XFlow  PsiBub  MaxRepellentWC  MinRepellentWC  MinRepellancyFactor  BD
              30         30              0.16  0.3   0.44  6E-12  3.4    -20     0.8             0.2             1                    1
              170        170             0.15  0.3   0.44  6E-12  3.4    -20     0.8             0.2             1                    1
              200        200             0.14  0.28  0.46  6E-12  3.4    -70     0.8             0.2             1                    1.2
              200        200             0.14  0.28  0.46  6E-12  3.4    -70     0.8             0.2             1                    1.2
              200        200             0.14  0.26  0.36  6E-12  3.4    -70     0.8             0.2             1                    1.3
              200        200             0.14  0.26  0.36  6E-12  3.4    -70     0.8             0.2             1                    1.4
              200        200             0.14  0.26  0.36  6E-12  3.4    -70     0.8             0.2             1                    1.5
              200        200             0.14  0.26  0.36  6E-12  3.4    -70     0.8             0.2             1                    1.6
          Factor Low: Specifications=[MultiPoreWater]
            MultiPoreWater: Salb=0.15; SubProfileConductance=100; WaterTableDepth=10; CalculateInfiltration=true; CalculateDrainage=true; ReportDetail=false; IncludeSorption=true; CalculateEvaporation=false; CalculateDiffusion=true; DiffusivityMultiplier=2; ExtractionMultiplier=0; ProfileWaterExtraction=0; TotalCover=0; ResidueWater=0; Hour=0; ReportLayer=0; TimeStep=0
              Thickness  ParamThickness  LL15  DUL   SAT   CFlow  XFlow  PsiBub  MaxRepellentWC  MinRepellentWC  MinRepellancyFactor  BD
              30         30              0.16  0.3   0.44  6E-12  3      -20     0.8             0.2             1                    1
              170        170             0.15  0.3   0.44  6E-12  3      -20     0.8             0.2             1                    1
              200        200             0.14  0.28  0.46  6E-12  3      -70     0.8             0.2             1                    1.2
              200        200             0.14  0.28  0.46  6E-12  3      -70     0.8             0.2             1                    1.2
              200        200             0.14  0.26  0.36  6E-12  3      -70     0.8             0.2             1                    1.3
              200        200             0.14  0.26  0.36  6E-12  3      -70     0.8             0.2             1                    1.4
              200        200             0.14  0.26  0.36  6E-12  3      -70     0.8             0.2             1                    1.5
              200        200             0.14  0.26  0.36  6E-12  3      -70     0.8             0.2             1                    1.6
      Simulation BaseDiffuse
        Clock: StartDate=1999-01-01; EndDate=1999-12-31
        Weather: FileName=lincoln.met
        Summary SummaryFile
        Zone Field: Area=1; Slope=0
          Report: EventNames=[Clock].DoReport
            VariableNames:
              [Clock].Today
              [IWeather].MaxT
              [IWeather].MinT
              [IWeather].Rain
              [IWeather].Radn
              [IWeather].Wind
              [IWeather].DayLength
              [IWeather].VP
              [IWeather].CO2
              [IWeather].RainfallHours
              sum([Soil].SoilWater.SWmm) as ProfileWater
              [Soil].SoilWater.SWmm
              [Soil].SoilWater.SW
              [Soil].MultiPoreWater.Water
              [Soil].MultiPoreWater.Drainage
              [Soil].MultiPoreWater.Infiltration
              [Soil].MultiPoreWater.pond
              [Soil].MultiPoreWater.DUL
              [Soil].MultiPoreWater.SAT
              [Irrigation].IrrigationApplied
              [Soil].MultiPoreWater.DeltaPond + [Soil].MultiPoreWater.Infiltration + [Soil].MultiPoreWater.Drainage as Check
              [Soil].SoilWater.Es
              [Soil].SoilWater.Eos
              sum([Soil].SoilWater.SWmm[1:4]) as TopWater
              sum([Soil].SoilWater.SWmm[5:8]) as BotWater
          Fertiliser
          SurfaceOrganicMatter: same as Sensibility.Transpiration.BaseTranspiration.Field.SurfaceOrganicMatter
          MicroClimate: a_interception=0; b_interception=1; c_interception=0; d_interception=0; soil_albedo=0.3; sun_angle=15; soil_heat_flux_fraction=0.4; night_interception_fraction=0.5; refheight=2; albedo=0.15; emissivity=0.96; RadIntTotal=0
          Irrigation
          Manager ClimateControl: same as Sensibility.Transpiration.BaseTranspiration.Field.ClimateControl
          Soil: ASCOrder=Vertosol; ASCSubOrder=Black; SoilType=Clay; Site=Norwin; NearestTown=Norwin; Region=Darling Downs and Granite Belt; State=Queensland; Country=Australia; NaturalVegetation=Qld. Bluegrass, possible Qld. Blue gum; ApsoilNumber=900; Latitude=-27.581836; Longitude=151.320206; LocationAccuracy=+/- 20m
            DataSource=CSIRO Sustainable Ecosystems, Toowoomba; Characteriesd as part of the GRDC funded project"Doing it better, doing it smarter, managing soil water in Australian agriculture' 2011
            Comments=OC, CLL for all crops estimated-based on Bongeen Mywybilla Soil No1
            MultiPoreWater: same as Validation.Residues.Base.Field.Soil.MultiPoreWater
            LayerStructure: Thickness=[30, 170, 200, 200, 200, 200, 200, 200]
            Evapotranspiration
            MRSpline
            SoilNitrogen: fom_type=[default, manure, mucuna, lablab, shemp, stable]; fract_carb=[0.2, 0.3, 0.54, 0.57, 0.45, 0]; fract_cell=[0.7, 0.3, 0.37, 0.37, 0.47, 0.1]; fract_lign=[0.1, 0.4, 0.09, 0.06, 0.08, 0.9]; wfpsN2N2O_x=[22, 88]; wfpsN2N2O_y=[0.1, 1]
            SoilOrganicMatter: same as Validation.Residues.Base.Field.Soil.SoilOrganicMatter
            Analysis: Thickness=[200, 200, 200, 200, 200, 200, 200]; PH=[6, 6, 6, 6, 6, 6, 6]; PHUnits=Water; BoronUnits=HotWater
            Sample InitialN: NO3Units=ppm; NH4Units=ppm; SWUnits=Volumetric; OCUnits=Total; PHUnits=Water
              Thickness  NO3  NH4
              150        10   0.1
              150        10   0.1
              300        10   0.1
              300        10   0.1
              300        10   0.1
              300        1    0.1
              300        1    0.1
            Sample InitialWater: Thickness=[30, 170, 200, 200, 200, 200, 200, 200]; SW=[0.44, 0.44, 0.46, 0.46, 0.36, 0.36, 0.36, 0.36]; NO3Units=ppm; NH4Units=ppm; SWUnits=Volumetric; OCUnits=Total; PHUnits=Water
            WEIRDO MultiPoreWater: same as Validation.Residues.Base.Field.Soil.MultiPoreWater
    Experiment Drainage
      Factors
        Factor Conductivity
          Factor High: Specifications=[MultiPoreWater]
            MultiPoreWater: Salb=0.15; SubProfileConductance=100; WaterTableDepth=10; CalculateInfiltration=true; CalculateDrainage=true; ReportDetail=false; IncludeSorption=true; CalculateEvaporation=false; CalculateDiffusion=false; DiffusivityMultiplier=2; ExtractionMultiplier=0; ProfileWaterExtraction=0; TotalCover=0; ResidueWater=0; Hour=0; ReportLayer=0; TimeStep=0
              Thickness  ParamThickness  LL15  DUL   SAT   CFlow  XFlow  PsiBub  MaxRepellentWC  MinRepellentWC  MinRepellancyFactor  BD
              30         30              0.16  0.3   0.44  6E-12  3.9    -20     0.8             0.2             1                    1
              170        170             0.15  0.3   0.44  6E-12  3.9    -20     0.8             0.2             1                    1
              200        200             0.14  0.28  0.46  6E-12  3.9    -70     0.8             0.2             1                    1.2
              200        200             0.14  0.28  0.46  6E-12  3.9    -70     0.8             0.2             1                    1.2
              200        200             0.14  0.26  0.36  6E-12  3.9    -70     0.8             0.2             1                    1.3
              200        200             0.14  0.26  0.36  6E-12  3.9    -70     0.8             0.2             1                    1.4
              200        200             0.14  0.26  0.36  6E-12  3.9    -70     0.8             0.2             1                    1.5
              200        200             0.14  0.26  0.36  6E-12  3.9    -70     0.8             0.2             1                    1.6
          Factor Mid: Specifications=[MultiPoreWater]
            MultiPoreWater: Salb=0.15; SubProfileConductance=100; WaterTableDepth=10; CalculateInfiltration=true; CalculateDrainage=true; ReportDetail=false; IncludeSorption=true; CalculateEvaporation=false; CalculateDiffusion=false; DiffusivityMultiplier=2; ExtractionMultiplier=0; ProfileWaterExtraction=0; TotalCover=0; ResidueWater=0; Hour=0; ReportLayer=0; TimeStep=0
              Thickness  ParamThickness  LL15  DUL   SAT   CFlow  XFlow  PsiBub  MaxRepellentWC  MinRepellentWC  MinRepellancyFactor  BD
              30         30              0.16  0.3   0.44  6E-12  3.4    -20     0.8             0.2             1                    1
              170        170             0.15  0.3   0.44  6E-12  3.4    -20     0.8             0.2             1                    1
              200        200             0.14  0.28  0.46  6E-12  3.4    -70     0.8             0.2             1                    1.2
              200        200             0.14  0.28  0.46  6E-12  3.4    -70     0.8             0.2             1                    1.2
              200        200             0.14  0.26  0.36  6E-12  3.4    -70     0.8             0.2             1                    1.3
              200        200             0.14  0.26  0.36  6E-12  3.4    -70     0.8             0.2             1                    1.4
              200        200             0.14  0.26  0.36  6E-12  3.4    -70     0.8             0.2             1                    1.5
              200        200             0.14  0.26  0.36  6E-12  3.4    -70     0.8             0.2             1                    1.6
          Factor Low: Specifications=[MultiPoreWater]
            MultiPoreWater: Salb=0.15; SubProfileConductance=100; WaterTableDepth=10; CalculateInfiltration=true; CalculateDrainage=true; ReportDetail=false; IncludeSorption=true; CalculateEvaporation=false; CalculateDiffusion=false; DiffusivityMultiplier=2; ExtractionMultiplier=0; ProfileWaterExtraction=0; TotalCover=0; ResidueWater=0; Hour=0; ReportLayer=0; TimeStep=0
              Thickness  ParamThickness  LL15  DUL   SAT   CFlow  XFlow  PsiBub  MaxRepellentWC  MinRepellentWC  MinRepellancyFactor  BD
              30         30              0.16  0.3   0.44  6E-12  3      -20     0.8             0.2             1                    1
              170        170             0.15  0.3   0.44  6E-12  3      -20     0.8             0.2             1                    1
              200        200             0.14  0.28  0.46  6E-12  3      -70     0.8             0.2             1                    1.2
              200        200             0.14  0.28  0.46  6E-12  3      -70     0.8             0.2             1                    1.2
              200        200             0.14  0.26  0.36  6E-12  3      -70     0.8             0.2             1                    1.3
              200        200             0.14  0.26  0.36  6E-12  3      -70     0.8             0.2             1                    1.4
              200        200             0.14  0.26  0.36  6E-12  3      -70     0.8             0.2             1                    1.5
              200        200             0.14  0.26  0.36  6E-12  3      -70     0.8             0.2             1                    1.6
      Simulation BaseDrain
        Clock: StartDate=1999-01-01; EndDate=1999-12-31
        Weather: FileName=lincoln.met
        Summary SummaryFile
        Zone Field: Area=1; Slope=0
          Report: EventNames=[Clock].DoReport
            VariableNames:
              [Clock].Today
              [IWeather].MaxT
              [IWeather].MinT
              [IWeather].Rain
              [IWeather].Radn
              [IWeather].Wind
              [IWeather].DayLength
              [IWeather].VP
              [IWeather].CO2
              [IWeather].RainfallHours
              sum([Soil].SoilWater.SWmm) as ProfileWater
              [Soil].SoilWater.SWmm
              [Soil].SoilWater.SW
              [Soil].MultiPoreWater.Water
              [Soil].MultiPoreWater.Drainage
              [Soil].MultiPoreWater.Infiltration
              [Soil].MultiPoreWater.pond
              [Soil].MultiPoreWater.DUL
              [Soil].MultiPoreWater.SAT
              [Irrigation].IrrigationApplied
              [Soil].MultiPoreWater.DeltaPond + [Soil].MultiPoreWater.Infiltration + [Soil].MultiPoreWater.Drainage as Check
              [Soil].SoilWater.Es
              [Soil].SoilWater.Eos
          Fertiliser
          SurfaceOrganicMatter: same as Sensibility.Transpiration.BaseTranspiration.Field.SurfaceOrganicMatter
          MicroClimate: a_interception=0; b_interception=1; c_interception=0; d_interception=0; soil_albedo=0.3; sun_angle=15; soil_heat_flux_fraction=0.4; night_interception_fraction=0.5; refheight=2; albedo=0.15; emissivity=0.96; RadIntTotal=0
          Irrigation
          Manager ClimateControl: same as Sensibility.Transpiration.BaseTranspiration.Field.ClimateControl
          Soil: ASCOrder=Vertosol; ASCSubOrder=Black; SoilType=Clay; Site=Norwin; NearestTown=Norwin; Region=Darling Downs and Granite Belt; State=Queensland; Country=Australia; NaturalVegetation=Qld. Bluegrass, possible Qld. Blue gum; ApsoilNumber=900; Latitude=-27.581836; Longitude=151.320206; LocationAccuracy=+/- 20m
            DataSource=CSIRO Sustainable Ecosystems, Toowoomba; Characteriesd as part of the GRDC funded project"Doing it better, doing it smarter, managing soil water in Australian agriculture' 2011
            Comments=OC, CLL for all crops estimated-based on Bongeen Mywybilla Soil No1
            MultiPoreWater: same as Validation.Residues.Base.Field.Soil.MultiPoreWater
            LayerStructure: Thickness=[30, 170, 200, 200, 200, 200, 200, 200]
            Evapotranspiration
            MRSpline
            SoilNitrogen: fom_type=[default, manure, mucuna, lablab, shemp, stable]; fract_carb=[0.2, 0.3, 0.54, 0.57, 0.45, 0]; fract_cell=[0.7, 0.3, 0.37, 0.37, 0.47, 0.1]; fract_lign=[0.1, 0.4, 0.09, 0.06, 0.08, 0.9]; wfpsN2N2O_x=[22, 88]; wfpsN2N2O_y=[0.1, 1]
            SoilOrganicMatter: same as Validation.Residues.Base.Field.Soil.SoilOrganicMatter
            Analysis: Thickness=[200, 200, 200, 200, 200, 200, 200]; PH=[6, 6, 6, 6, 6, 6, 6]; PHUnits=Water; BoronUnits=HotWater
            Sample InitialN: NO3Units=ppm; NH4Units=ppm; SWUnits=Volumetric; OCUnits=Total; PHUnits=Water
              Thickness  NO3  NH4
              150        10   0.1
              150        10   0.1
              300        10   0.1
              300        10   0.1
              300        10   0.1
              300        1    0.1
              300        1    0.1
            Sample InitialWater: Thickness=[50, 150, 200, 200, 200, 200, 200, 200]; SW=[0.44, 0.44, 0.46, 0.46, 0.36, 0.36, 0.36, 0.36]; NO3Units=ppm; NH4Units=ppm; SWUnits=Volumetric; OCUnits=Total; PHUnits=Water
            WEIRDO MultiPoreWater: same as Validation.Residues.Base.Field.Soil.MultiPoreWater
    Experiment Repellency
      Factors
        Factor Repellency
          Factor High: Specifications=[MultiPoreWater]
            MultiPoreWater: Salb=0.15; SubProfileConductance=100; WaterTableDepth=10; CalculateInfiltration=true; CalculateDrainage=true; ReportDetail=false; IncludeSorption=true; CalculateEvaporation=false; CalculateDiffusion=false; DiffusivityMultiplier=5; ExtractionMultiplier=0; ProfileWaterExtraction=0; TotalCover=0; ResidueWater=0; Hour=0; ReportLayer=0; TimeStep=0
              Thickness  ParamThickness  LL15  DUL   SAT   CFlow  XFlow  PsiBub  MaxRepellentWC  MinRepellentWC  MinRepellancyFactor  BD
              10         30              0.16  0.3   0.44  6E-11  3      -20     0.8             0.2             0.01                 1
              190        170             0.15  0.3   0.44  6E-11  3      -20     0.8             0.2             0.01                 1
              200        200             0.14  0.28  0.46  6E-11  3      -70     0.8             0.2             0.01                 1.2
              200        200             0.14  0.28  0.46  6E-11  3      -70     0.8             0.2             0.01                 1.2
              200        200             0.14  0.26  0.36  6E-11  3      -70     0.8             0.2             0.01                 1.3
              200        200             0.14  0.26  0.36  6E-11  3      -70     0.8             0.2             0.01                 1.4
              200        200             0.14  0.26  0.36  6E-11  3      -70     0.8             0.2             0.01                 1.5
              200        200             0.14  0.26  0.36  6E-11  3      -70     0.8             0.2             0.01                 1.6
          Factor Moderate: Specifications=[MultiPoreWater]
            MultiPoreWater: Salb=0.15; SubProfileConductance=100; WaterTableDepth=10; CalculateInfiltration=true; CalculateDrainage=true; ReportDetail=false; IncludeSorption=true; CalculateEvaporation=false; CalculateDiffusion=false; DiffusivityMultiplier=5; ExtractionMultiplier=0; ProfileWaterExtraction=0; TotalCover=0; ResidueWater=0; Hour=0; ReportLayer=0; TimeStep=0
              Thickness  ParamThickness  LL15  DUL   SAT   CFlow  XFlow  PsiBub  MaxRepellentWC  MinRepellentWC  MinRepellancyFactor  BD
              10         30              0.16  0.3   0.44  6E-11  3      -20     0.8             0.2             0.05                 1
              190        170             0.15  0.3   0.44  6E-11  3      -20     0.8             0.2             0.05                 1
              200        200             0.14  0.28  0.46  6E-11  3      -70     0.8             0.2             0.05                 1.2
              200        200             0.14  0.28  0.46  6E-11  3      -70     0.8             0.2             0.05                 1.2
              200        200             0.14  0.26  0.36  6E-11  3      -70     0.8             0.2             0.05                 1.3
              200        200             0.14  0.26  0.36  6E-11  3      -70     0.8             0.2             0.05                 1.4
              200        200             0.14  0.26  0.36  6E-11  3      -70     0.8             0.2             0.05                 1.5
              200        200             0.14  0.26  0.36  6E-11  3      -70     0.8             0.2             0.05                 1.6
          Factor None: Specifications=[MultiPoreWater]
            MultiPoreWater: Salb=0.15; SubProfileConductance=100; WaterTableDepth=10; CalculateInfiltration=true; CalculateDrainage=true; ReportDetail=false; IncludeSorption=true; CalculateEvaporation=false; CalculateDiffusion=false; DiffusivityMultiplier=5; ExtractionMultiplier=0; ProfileWaterExtraction=0; TotalCover=0; ResidueWater=0; Hour=0; ReportLayer=0; TimeStep=0
              Thickness  ParamThickness  LL15  DUL   SAT   CFlow  XFlow  PsiBub  MaxRepellentWC  MinRepellentWC  MinRepellancyFactor  BD
              10         30              0.16  0.3   0.44  6E-11  3      -20     0.8             0.2             1                    1
              190        170             0.15  0.3   0.44  6E-11  3      -20     0.8             0.2             1                    1
              200        200             0.14  0.28  0.46  6E-11  3      -70     0.8             0.2             1                    1.2
              200        200             0.14  0.28  0.46  6E-11  3      -70     0.8             0.2             1                    1.2
              200        200             0.14  0.26  0.36  6E-11  3      -70     0.8             0.2             1                    1.3
              200        200             0.14  0.26  0.36  6E-11  3      -70     0.8             0.2             1                    1.4
              200        200             0.14  0.26  0.36  6E-11  3      -70     0.8             0.2             1                    1.5
              200        200             0.14  0.26  0.36  6E-11  3      -70     0.8             0.2             1                    1.6
      Simulation BaseRepell
        Clock: StartDate=1999-01-01; EndDate=1999-12-31
        Weather: FileName=lincoln.met
        Summary SummaryFile
        Zone Field: Area=1; Slope=0
          Report: EventNames=[Clock].DoReport
            VariableNames:
              [Clock].Today
              [IWeather].MaxT
              [IWeather].MinT
              [IWeather].Rain
              [IWeather].Radn
              [IWeather].Wind
              [IWeather].DayLength
              [IWeather].VP
              [IWeather].CO2
              [IWeather].RainfallHours
              sum([Soil].SoilWater.SWmm) as ProfileWater
              [Soil].SoilWater.SWmm
              [Soil].SoilWater.SW
              [Soil].MultiPoreWater.Water
              [Soil].MultiPoreWater.Drainage
              [Soil].MultiPoreWater.Infiltration
              [Soil].MultiPoreWater.pond
              [Soil].MultiPoreWater.DUL
              [Irrigation].IrrigationApplied
              [Soil].MultiPoreWater.DeltaPond + [Soil].MultiPoreWater.Infiltration + [Soil].MultiPoreWater.Drainage as Check
              [Soil].SoilWater.Es
              [Soil].SoilWater.Eos
              [Soil].MultiPoreWater.Ksat
          Fertiliser
          SurfaceOrganicMatter: same as Sensibility.Transpiration.BaseTranspiration.Field.SurfaceOrganicMatter
          MicroClimate: a_interception=0; b_interception=1; c_interception=0; d_interception=0; soil_albedo=0.3; sun_angle=15; soil_heat_flux_fraction=0.4; night_interception_fraction=0.5; refheight=2; albedo=0.15; emissivity=0.96; RadIntTotal=0
          Irrigation
          Manager ClimateControl
```csharp
using System;
using Models.Core;
using APSIM.Shared.Utilities;



using System.Collections.Generic;
using System.Text;
using Models.PMF;
using Models;
using System.Xml.Serialization;

namespace Models
{
	[Serializable] 
	[System.Xml.Serialization.XmlInclude(typeof(Model))]
	public class Script : Model
	{
		[Link] Weather Met;
		[Link] Clock Clock;
    
		[EventSubscribe("PreparingNewWeatherData")]
		private void OnPreparingNewWeatherData(object sender, EventArgs e)
		{
			Met.Rain = 0;	
			Met.MaxT = 0;
			Met.MinT = 0;
			Met.Radn = 0;
			Met.VP = 1;
			Met.Wind = 0;
		}
	}
}
```
          Manager Irrigate on a fixed date
            IrrigateDate = 1-feb
            Amount = 30
            Depth = 0
            Efficiency = 1
            WillRunoff = False
            Duration = 0.5
```csharp
using System;
using Models.Core;
using Models.PMF;
using APSIM.Shared.Utilities;
namespace Models
{
	[Serializable]
	public class Script : Model
	{
		[Link] Clock Clock;
		[Link] Irrigation Irrigation;
		
		[Description("Date to irrigate")]
		public string IrrigateDate { get; set; }
		
		[Description("Amount of irrigation to be applied (mm)")]
		public double Amount { get; set; }
		
		[Description("Depth of irrigation (mm)")]
		public double Depth { get; set; }
		
		[Description("Efficiency of irrigation (0-1)")]
		public double Efficiency { get; set; }
		
		[Description("Will the irrigation runoff?")]
		public bool WillRunoff { get; set; }
		
		[Description("How may hours did it take to apply irrigation?")]
		public double Duration { get; set; }
		
		
		[EventSubscribe("DoManagement")]
		private void OnDoManagement(object sender, EventArgs e)
		{
			if (DateUtilities.WithinDates(IrrigateDate, Clock.Today, IrrigateDate))
			{
				Irrigation.Apply(amount: Amount, depth: Depth, efficiency: Efficiency, willRunoff: WillRunoff, duration: Duration);
			}
		}
	}
}
```
          Manager Irrigate on a fixed date1
            IrrigateDate = 1-Mar
            Amount = 30
            Depth = 0
            Efficiency = 1
            WillRunoff = False
            Duration = 0.5
            script: same as in Sensibility.Repellency.BaseRepell.Field.Irrigate on a fixed date
          Manager Irrigate on a fixed date11
            IrrigateDate = 15-Mar
            Amount = 30
            Depth = 0
            Efficiency = 1
            WillRunoff = False
            Duration = 0.5
            script: same as in Sensibility.Repellency.BaseRepell.Field.Irrigate on a fixed date
          Manager Irrigate on a fixed date111
            IrrigateDate = 25-Mar
            Amount = 30
            Depth = 0
            Efficiency = 1
            WillRunoff = False
            Duration = 0.5
            script: same as in Sensibility.Repellency.BaseRepell.Field.Irrigate on a fixed date
          Manager Irrigate on a fixed date1111
            IrrigateDate = 5-Apr
            Amount = 30
            Depth = 0
            Efficiency = 1
            WillRunoff = False
            Duration = 0.5
            script: same as in Sensibility.Repellency.BaseRepell.Field.Irrigate on a fixed date
          Manager Irrigate on a fixed date11111
            IrrigateDate = 15-Apr
            Amount = 30
            Depth = 0
            Efficiency = 1
            WillRunoff = False
            Duration = 0.5
            script: same as in Sensibility.Repellency.BaseRepell.Field.Irrigate on a fixed date
          Manager Irrigate on a fixed date111111
            IrrigateDate = 25-Apr
            Amount = 30
            Depth = 0
            Efficiency = 1
            WillRunoff = False
            Duration = 0.5
            script: same as in Sensibility.Repellency.BaseRepell.Field.Irrigate on a fixed date
          Manager Irrigate on a fixed date1111111
            IrrigateDate = 5-May
            Amount = 30
            Depth = 0
            Efficiency = 1
            WillRunoff = False
            Duration = 0.5
            script: same as in Sensibility.Repellency.BaseRepell.Field.Irrigate on a fixed date
          Manager Irrigate on a fixed date11111111
            IrrigateDate = 15-May
            Amount = 30
            Depth = 0
            Efficiency = 1
            WillRunoff = False
            Duration = 0.5
            script: same as in Sensibility.Repellency.BaseRepell.Field.Irrigate on a fixed date
          Manager Irrigate on a fixed date111111111
            IrrigateDate = 25-May
            Amount = 30
            Depth = 0
            Efficiency = 1
            WillRunoff = False
            Duration = 0.5
            script: same as in Sensibility.Repellency.BaseRepell.Field.Irrigate on a fixed date
          Soil: ASCOrder=Vertosol; ASCSubOrder=Black; SoilType=Clay; Site=Norwin; NearestTown=Norwin; Region=Darling Downs and Granite Belt; State=Queensland; Country=Australia; NaturalVegetation=Qld. Bluegrass, possible Qld. Blue gum; ApsoilNumber=900; Latitude=-27.581836; Longitude=151.320206; LocationAccuracy=+/- 20m
            DataSource=CSIRO Sustainable Ecosystems, Toowoomba; Characteriesd as part of the GRDC funded project"Doing it better, doing it smarter, managing soil water in Australian agriculture' 2011
            Comments=OC, CLL for all crops estimated-based on Bongeen Mywybilla Soil No1
            MultiPoreWater: same as Validation.Residues.Base.Field.Soil.MultiPoreWater
            LayerStructure: Thickness=[30, 170, 200, 200, 200, 200, 200, 200]
            Evapotranspiration
            MRSpline
            SoilNitrogen: fom_type=[default, manure, mucuna, lablab, shemp, stable]; fract_carb=[0.2, 0.3, 0.54, 0.57, 0.45, 0]; fract_cell=[0.7, 0.3, 0.37, 0.37, 0.47, 0.1]; fract_lign=[0.1, 0.4, 0.09, 0.06, 0.08, 0.9]; wfpsN2N2O_x=[22, 88]; wfpsN2N2O_y=[0.1, 1]
            SoilOrganicMatter: same as Validation.Residues.Base.Field.Soil.SoilOrganicMatter
            Analysis: Thickness=[200, 200, 200, 200, 200, 200, 200]; PH=[6, 6, 6, 6, 6, 6, 6]; PHUnits=Water; BoronUnits=HotWater
            Sample InitialN: NO3Units=ppm; NH4Units=ppm; SWUnits=Volumetric; OCUnits=Total; PHUnits=Water
              Thickness  NO3  NH4
              150        10   0.1
              150        10   0.1
              300        10   0.1
              300        10   0.1
              300        10   0.1
              300        1    0.1
              300        1    0.1
            Sample InitialWater: Thickness=[50, 150, 200, 200, 200, 200, 200, 200]; SW=[0.16, 0.15, 0.14, 0.14, 0.14, 0.14, 0.14, 0.14]; NO3Units=ppm; NH4Units=ppm; SWUnits=Volumetric; OCUnits=Total; PHUnits=Water
            WEIRDO MultiPoreWater: same as Validation.Residues.Base.Field.Soil.MultiPoreWater
    Experiment Rewetting
      Factors
        Factor MatrixConductivity
          Factor High: Specifications=[MultiPoreWater]
            MultiPoreWater: Salb=0.15; SubProfileConductance=100; WaterTableDepth=10; CalculateInfiltration=true; CalculateDrainage=true; ReportDetail=false; IncludeSorption=true; CalculateEvaporation=false; CalculateDiffusion=false; DiffusivityMultiplier=5; ExtractionMultiplier=0; ProfileWaterExtraction=0; TotalCover=0; ResidueWater=0; Hour=0; ReportLayer=0; TimeStep=0
              Thickness  ParamThickness  LL15  DUL   SAT   CFlow  XFlow  PsiBub  MaxRepellentWC  MinRepellentWC  MinRepellancyFactor  BD
              10         30              0.2   0.38  0.45  7E-08  2.5    -20     0.8             0.2             1                    1
              190        170             0.2   0.38  0.45  7E-08  2.5    -20     0.8             0.2             1                    1
              200        200             0.2   0.38  0.45  7E-08  2.5    -70     0.8             0.2             1                    1.2
              200        200             0.2   0.38  0.45  7E-08  2.5    -70     0.8             0.2             1                    1.2
              200        200             0.2   0.38  0.45  7E-08  2.5    -70     0.8             0.2             1                    1.3
              200        200             0.2   0.38  0.45  7E-08  2.5    -70     0.8             0.2             1                    1.4
              200        200             0.2   0.38  0.45  7E-08  2.5    -70     0.8             0.2             1                    1.5
              200        200             0.2   0.38  0.45  7E-08  2.5    -70     0.8             0.2             1                    1.6
          Factor Moderate: Specifications=[MultiPoreWater]
            MultiPoreWater: Salb=0.15; SubProfileConductance=100; WaterTableDepth=10; CalculateInfiltration=true; CalculateDrainage=true; ReportDetail=false; IncludeSorption=true; CalculateEvaporation=false; CalculateDiffusion=false; DiffusivityMultiplier=5; ExtractionMultiplier=0; ProfileWaterExtraction=0; TotalCover=0; ResidueWater=0; Hour=0; ReportLayer=0; TimeStep=0
              Thickness  ParamThickness  LL15  DUL   SAT   CFlow  XFlow  PsiBub  MaxRepellentWC  MinRepellentWC  MinRepellancyFactor  BD
              10         30              0.2   0.38  0.45  5E-09  3      -20     0.8             0.2             1                    1
              190        170             0.2   0.38  0.45  5E-09  3      -20     0.8             0.2             1                    1
              200        200             0.2   0.38  0.45  5E-09  3      -70     0.8             0.2             1                    1.2
              200        200             0.2   0.38  0.45  5E-09  3      -70     0.8             0.2             1                    1.2
              200        200             0.2   0.38  0.45  5E-09  3      -70     0.8             0.2             1                    1.3
              200        200             0.2   0.38  0.45  5E-09  3      -70     0.8             0.2             1                    1.4
              200        200             0.2   0.38  0.45  5E-09  3      -70     0.8             0.2             1                    1.5
              200        200             0.2   0.38  0.45  5E-09  3      -70     0.8             0.2             1                    1.6
          Factor Low: Specifications=[MultiPoreWater]
            MultiPoreWater: Salb=0.15; SubProfileConductance=100; WaterTableDepth=10; CalculateInfiltration=true; CalculateDrainage=true; ReportDetail=false; IncludeSorption=true; CalculateEvaporation=false; CalculateDiffusion=false; DiffusivityMultiplier=5; ExtractionMultiplier=0; ProfileWaterExtraction=0; TotalCover=0; ResidueWater=0; Hour=0; ReportLayer=0; TimeStep=0
              Thickness  ParamThickness  LL15  DUL   SAT   CFlow  XFlow  PsiBub  MaxRepellentWC  MinRepellentWC  MinRepellancyFactor  BD
              10         30              0.2   0.38  0.45  8E-12  4      -10     0.8             0.2             1                    1
              190        170             0.2   0.38  0.45  8E-12  4      -10     0.8             0.2             1                    1
              200        200             0.2   0.38  0.45  8E-12  4      -10     0.8             0.2             1                    1.2
              200        200             0.2   0.38  0.45  8E-12  4      -10     0.8             0.2             1                    1.2
              200        200             0.2   0.38  0.45  8E-12  4      -10     0.8             0.2             1                    1.3
              200        200             0.2   0.38  0.45  8E-12  4      -10     0.8             0.2             1                    1.4
              200        200             0.2   0.38  0.45  8E-12  4      -10     0.8             0.2             1                    1.5
              200        200             0.2   0.38  0.45  8E-12  4      -10     0.8             0.2             1                    1.6
      Simulation BaseRewet
        Clock: StartDate=1999-01-01; EndDate=1999-12-31
        Weather: FileName=lincoln.met
        Summary SummaryFile
        Zone Field: Area=1; Slope=0
          Report: same as Sensibility.Repellency.BaseRepell.Field.Report
          Fertiliser
          SurfaceOrganicMatter: same as Sensibility.Transpiration.BaseTranspiration.Field.SurfaceOrganicMatter
          MicroClimate: a_interception=0; b_interception=1; c_interception=0; d_interception=0; soil_albedo=0.3; sun_angle=15; soil_heat_flux_fraction=0.4; night_interception_fraction=0.5; refheight=2; albedo=0.15; emissivity=0.96; RadIntTotal=0
          Irrigation
          Manager ClimateControl: same as Sensibility.Repellency.BaseRepell.Field.ClimateControl
          Manager Irrigate on a fixed date: same as Sensibility.Repellency.BaseRepell.Field.Irrigate on a fixed date
          Soil: ASCOrder=Vertosol; ASCSubOrder=Black; SoilType=Clay; Site=Norwin; NearestTown=Norwin; Region=Darling Downs and Granite Belt; State=Queensland; Country=Australia; NaturalVegetation=Qld. Bluegrass, possible Qld. Blue gum; ApsoilNumber=900; Latitude=-27.581836; Longitude=151.320206; LocationAccuracy=+/- 20m
            DataSource=CSIRO Sustainable Ecosystems, Toowoomba; Characteriesd as part of the GRDC funded project"Doing it better, doing it smarter, managing soil water in Australian agriculture' 2011
            Comments=OC, CLL for all crops estimated-based on Bongeen Mywybilla Soil No1
            MultiPoreWater: same as Validation.Residues.Base.Field.Soil.MultiPoreWater
            LayerStructure: Thickness=[30, 170, 200, 200, 200, 200, 200, 200]
            Evapotranspiration
            MRSpline
            SoilNitrogen: fom_type=[default, manure, mucuna, lablab, shemp, stable]; fract_carb=[0.2, 0.3, 0.54, 0.57, 0.45, 0]; fract_cell=[0.7, 0.3, 0.37, 0.37, 0.47, 0.1]; fract_lign=[0.1, 0.4, 0.09, 0.06, 0.08, 0.9]; wfpsN2N2O_x=[22, 88]; wfpsN2N2O_y=[0.1, 1]
            SoilOrganicMatter: same as Validation.Residues.Base.Field.Soil.SoilOrganicMatter
            Analysis: Thickness=[200, 200, 200, 200, 200, 200, 200]; PH=[6, 6, 6, 6, 6, 6, 6]; PHUnits=Water; BoronUnits=HotWater
            Sample InitialN: NO3Units=ppm; NH4Units=ppm; SWUnits=Volumetric; OCUnits=Total; PHUnits=Water
              Thickness  NO3  NH4
              150        10   0.1
              150        10   0.1
              300        10   0.1
              300        10   0.1
              300        10   0.1
              300        1    0.1
              300        1    0.1
            Sample InitialWater: Thickness=[50, 150, 200, 200, 200, 200, 200, 200]; SW=[0.2, 0.2, 0.2, 0.2, 0.2, 0.2, 0.2, 0.2]; NO3Units=ppm; NH4Units=ppm; SWUnits=Volumetric; OCUnits=Total; PHUnits=Water
            WEIRDO MultiPoreWater: same as Validation.Residues.Base.Field.Soil.MultiPoreWater
    Experiment Evaporation
      Factors
        Factor IntitialWater
          Factor Moist: Specifications=[InitialWater]
            Sample InitialWater: Thickness=[50, 150, 200, 200, 200, 200, 200, 200]; SW=[0.3, 0.3, 0.3, 0.3, 0.3, 0.3, 0.3, 0.3]; NO3Units=ppm; NH4Units=ppm; SWUnits=Volumetric; OCUnits=Total; PHUnits=Water
          Factor Dryer: Specifications=[InitialWater]
            Sample InitialWater: Thickness=[50, 150, 200, 200, 200, 200, 200, 200]; SW=[0.24, 0.24, 0.24, 0.24, 0.24, 0.24, 0.24, 0.24]; NO3Units=ppm; NH4Units=ppm; SWUnits=Volumetric; OCUnits=Total; PHUnits=Water
          Factor DryerStill: Specifications=[InitialWater]
            Sample InitialWater: Thickness=[50, 150, 200, 200, 200, 200, 200, 200]; SW=[0.18, 0.18, 0.18, 0.18, 0.18, 0.18, 0.18, 0.18]; NO3Units=ppm; NH4Units=ppm; SWUnits=Volumetric; OCUnits=Total; PHUnits=Water
      Simulation BaseEvap
        Clock: StartDate=1999-01-01; EndDate=1999-12-31
        Weather: FileName=lincoln.met
        Summary SummaryFile
        Zone Field: Area=1; Slope=0
          Report: EventNames=[Clock].DoReport
            VariableNames:
              [Clock].Today
              [IWeather].MaxT
              [IWeather].MinT
              [IWeather].Rain
              [IWeather].Radn
              [IWeather].Wind
              [IWeather].DayLength
              [IWeather].VP
              [IWeather].CO2
              [IWeather].RainfallHours
              sum([Soil].SoilWater.SWmm) as ProfileWater
              [Soil].SoilWater.SWmm
              [Soil].SoilWater.SW
              [Soil].MultiPoreWater.Water
              [Soil].MultiPoreWater.Drainage
              [Soil].MultiPoreWater.Infiltration
              [Soil].MultiPoreWater.pond
              [Soil].MultiPoreWater.DUL
              [Irrigation].IrrigationApplied
              [Soil].MultiPoreWater.DeltaPond + [Soil].MultiPoreWater.Infiltration + [Soil].MultiPoreWater.Drainage as Check
              [Soil].SoilWater.Es
              [Soil].SoilWater.Eos
          Fertiliser
          SurfaceOrganicMatter: same as Sensibility.Transpiration.BaseTranspiration.Field.SurfaceOrganicMatter
          MicroClimate: a_interception=0; b_interception=1; c_interception=0; d_interception=0; soil_albedo=0.3; sun_angle=15; soil_heat_flux_fraction=0.4; night_interception_fraction=0.5; refheight=2; albedo=0.15; emissivity=0.96; RadIntTotal=0
          Irrigation
          Manager ClimateControl: same as Sensibility.Transpiration.BaseTranspiration.Field.ClimateControl
          Soil: ASCOrder=Vertosol; ASCSubOrder=Black; SoilType=Clay; Site=Norwin; NearestTown=Norwin; Region=Darling Downs and Granite Belt; State=Queensland; Country=Australia; NaturalVegetation=Qld. Bluegrass, possible Qld. Blue gum; ApsoilNumber=900; Latitude=-27.581836; Longitude=151.320206; LocationAccuracy=+/- 20m
            DataSource=CSIRO Sustainable Ecosystems, Toowoomba; Characteriesd as part of the GRDC funded project"Doing it better, doing it smarter, managing soil water in Australian agriculture' 2011
            Comments=OC, CLL for all crops estimated-based on Bongeen Mywybilla Soil No1
            MultiPoreWater: Salb=0.15; SubProfileConductance=20; WaterTableDepth=10; CalculateInfiltration=true; CalculateDrainage=true; ReportDetail=false; IncludeSorption=true; CalculateEvaporation=true; CalculateDiffusion=true; DiffusivityMultiplier=2; ExtractionMultiplier=0; ProfileWaterExtraction=0; TotalCover=0; ResidueWater=0; Hour=0; ReportLayer=0; TimeStep=0
              Thickness  ParamThickness  LL15  DUL  SAT   CFlow  XFlow  PsiBub  MaxRepellentWC  MinRepellentWC  MinRepellancyFactor  BD
              30         30              0.16  0.3  0.44  7E-11  3      -20     0.8             0.2             1                    1
              170        170             0.16  0.3  0.44  7E-11  3      -20     0.8             0.2             1                    1
              200        200             0.16  0.3  0.44  7E-11  3      -70     0.8             0.2             1                    1.2
              200        200             0.16  0.3  0.44  7E-11  3      -70     0.8             0.2             1                    1.2
              200        200             0.16  0.3  0.44  7E-11  3      -70     0.8             0.2             1                    1.3
              200        200             0.16  0.3  0.44  7E-11  3      -70     0.8             0.2             1                    1.4
              200        200             0.16  0.3  0.44  7E-11  3      -70     0.8             0.2             1                    1.5
              200        200             0.16  0.3  0.44  7E-11  3      -70     0.8             0.2             1                    1.6
            LayerStructure: Thickness=[30, 170, 200, 200, 200, 200, 200, 200]
            Evapotranspiration
            MRSpline
            SoilNitrogen: fom_type=[default, manure, mucuna, lablab, shemp, stable]; fract_carb=[0.2, 0.3, 0.54, 0.57, 0.45, 0]; fract_cell=[0.7, 0.3, 0.37, 0.37, 0.47, 0.1]; fract_lign=[0.1, 0.4, 0.09, 0.06, 0.08, 0.9]; wfpsN2N2O_x=[22, 88]; wfpsN2N2O_y=[0.1, 1]
            SoilOrganicMatter: same as Validation.Residues.Base.Field.Soil.SoilOrganicMatter
            Analysis: Thickness=[200, 200, 200, 200, 200, 200, 200]; PH=[6, 6, 6, 6, 6, 6, 6]; PHUnits=Water; BoronUnits=HotWater
            Sample InitialN: NO3Units=ppm; NH4Units=ppm; SWUnits=Volumetric; OCUnits=Total; PHUnits=Water
              Thickness  NO3  NH4
              150        10   0.1
              150        10   0.1
              300        10   0.1
              300        10   0.1
              300        10   0.1
              300        1    0.1
              300        1    0.1
            Sample InitialWater: Thickness=[50, 150, 200, 200, 200, 200, 200, 200]; SW=[0.27, 0.27, 0.25, 0.25, 0.2, 0.25, 0.25, 0.25]; NO3Units=ppm; NH4Units=ppm; SWUnits=Volumetric; OCUnits=Total; PHUnits=Water
            WEIRDO MultiPoreWater: Salb=0.15; SubProfileConductance=20; WaterTableDepth=10; CalculateInfiltration=true; CalculateDrainage=true; ReportDetail=false; IncludeSorption=true; CalculateEvaporation=true; CalculateDiffusion=true; DiffusivityMultiplier=2; ExtractionMultiplier=0; ProfileWaterExtraction=0; TotalCover=0; ResidueWater=0; Hour=0; ReportLayer=0; TimeStep=0
              Thickness  ParamThickness  LL15  DUL  SAT   CFlow  XFlow  PsiBub  MaxRepellentWC  MinRepellentWC  MinRepellancyFactor  BD
              30         30              0.16  0.3  0.44  7E-11  3      -20     0.8             0.2             1                    1
              170        170             0.16  0.3  0.44  7E-11  3      -20     0.8             0.2             1                    1
              200        200             0.16  0.3  0.44  7E-11  3      -70     0.8             0.2             1                    1.2
              200        200             0.16  0.3  0.44  7E-11  3      -70     0.8             0.2             1                    1.2
              200        200             0.16  0.3  0.44  7E-11  3      -70     0.8             0.2             1                    1.3
              200        200             0.16  0.3  0.44  7E-11  3      -70     0.8             0.2             1                    1.4
              200        200             0.16  0.3  0.44  7E-11  3      -70     0.8             0.2             1                    1.5
              200        200             0.16  0.3  0.44  7E-11  3      -70     0.8             0.2             1                    1.6
    Experiment Irrigation
      Factors
        Factor IrrigDuration
          Specifications=[Irrigate on a fixed date].Script.Duration = 0.1,0.3,0.7,1,2,6
      Simulation BaseIrrigation
        Clock: StartDate=1999-01-01; EndDate=1999-03-31
        Weather: FileName=lincoln.met
        Summary SummaryFile
        Zone Field: Area=1; Slope=0
          Report: EventNames=[Clock].DoReport
            VariableNames:
              [Clock].Today
              [IWeather].MaxT
              [IWeather].MinT
              [IWeather].Rain
              [IWeather].Radn
              [IWeather].Wind
              [IWeather].DayLength
              [IWeather].VP
              [IWeather].CO2
              [IWeather].RainfallHours
              sum([Soil].SoilWater.SWmm) as ProfileWater
              [Soil].SoilWater.SWmm
              [Soil].SoilWater.SW
              [Soil].MultiPoreWater.Water
              [Soil].MultiPoreWater.Drainage
              [Soil].MultiPoreWater.Infiltration
              [Soil].MultiPoreWater.pond
              [Irrigation].IrrigationApplied
              [Soil].MultiPoreWater.DeltaPond + [Soil].MultiPoreWater.Infiltration + [Soil].MultiPoreWater.Drainage as Check
          Fertiliser
          SurfaceOrganicMatter: same as Sensibility.Transpiration.BaseTranspiration.Field.SurfaceOrganicMatter
          MicroClimate: a_interception=0; b_interception=1; c_interception=0; d_interception=0; soil_albedo=0.3; sun_angle=15; soil_heat_flux_fraction=0.4; night_interception_fraction=0.5; refheight=2; albedo=0.15; emissivity=0.96; RadIntTotal=0
          Irrigation
          Manager Irrigate on a fixed date
            IrrigateDate = 1-feb
            Amount = 10
            Depth = 0
            Efficiency = 1
            WillRunoff = False
            Duration = 0.5
            script: same as in Sensibility.Repellency.BaseRepell.Field.Irrigate on a fixed date
          Soil: same as Validation.Residues.Base.Field.Soil
    Experiment Infiltration
      Factors
        Factor ItitialWater
          Factor Sat: Specifications=[InitialWater]
            Sample InitialWater: Thickness=[50, 150, 200, 200, 200, 200, 200, 200]; SW=[0.44, 0.44, 0.44, 0.44, 0.44, 0.44, 0.44, 0.44]; NO3Units=ppm; NH4Units=ppm; SWUnits=Volumetric; OCUnits=Total; PHUnits=Water
          Factor Mid: Specifications=[InitialWater]
            Sample Mid: Thickness=[50, 150, 200, 200, 200, 200, 200, 200]; SW=[0.25, 0.25, 0.25, 0.25, 0.2, 0.25, 0.25, 0.25]; NO3Units=ppm; NH4Units=ppm; SWUnits=Volumetric; OCUnits=Total; PHUnits=Water
          Factor LL: Specifications=[InitialWater]
            Sample InitialWater: Thickness=[50, 150, 200, 200, 200, 200, 200, 200]; SW=[0.16, 0.16, 0.16, 0.16, 0.16, 0.16, 0.16, 0.16]; NO3Units=ppm; NH4Units=ppm; SWUnits=Volumetric; OCUnits=Total; PHUnits=Water
        Factor MacroPores
          Factor Many: Specifications=[MultiPoreWater]
            MultiPoreWater: Salb=0.15; SubProfileConductance=20; WaterTableDepth=10; CalculateInfiltration=true; CalculateDrainage=true; ReportDetail=false; IncludeSorption=true; CalculateEvaporation=true; CalculateDiffusion=true; DiffusivityMultiplier=2; ExtractionMultiplier=0; ProfileWaterExtraction=0; TotalCover=0; ResidueWater=0; Hour=0; ReportLayer=0; TimeStep=0
              Thickness  ParamThickness  LL15  DUL  SAT   CFlow  XFlow  PsiBub  MaxRepellentWC  MinRepellentWC  MinRepellancyFactor  BD
              30         30              0.16  0.3  0.44  7E-11  3      -20     0.8             0.2             1                    1
              170        170             0.16  0.3  0.44  7E-11  3      -20     0.8             0.2             1                    1
              200        200             0.16  0.3  0.44  7E-11  3      -20     0.8             0.2             1                    1.2
              200        200             0.16  0.3  0.44  7E-11  3      -20     0.8             0.2             1                    1.2
              200        200             0.16  0.3  0.44  7E-11  3      -20     0.8             0.2             1                    1.3
              200        200             0.16  0.3  0.44  7E-11  3      -20     0.8             0.2             1                    1.4
              200        200             0.16  0.3  0.44  7E-11  3      -20     0.8             0.2             1                    1.5
              200        200             0.16  0.3  0.44  7E-11  3      -20     0.8             0.2             1                    1.6
          Factor Few: Specifications=[MultiPoreWater]
            MultiPoreWater: Salb=0.15; SubProfileConductance=20; WaterTableDepth=10; CalculateInfiltration=true; CalculateDrainage=true; ReportDetail=false; IncludeSorption=true; CalculateEvaporation=true; CalculateDiffusion=true; DiffusivityMultiplier=2; ExtractionMultiplier=0; ProfileWaterExtraction=0; TotalCover=0; ResidueWater=0; Hour=0; ReportLayer=0; TimeStep=0
              Thickness  ParamThickness  LL15  DUL  SAT   CFlow  XFlow  PsiBub  MaxRepellentWC  MinRepellentWC  MinRepellancyFactor  BD
              30         30              0.16  0.4  0.44  7E-11  3      -20     0.8             0.2             1                    1
              170        170             0.16  0.4  0.44  7E-11  3      -20     0.8             0.2             1                    1
              200        200             0.16  0.4  0.44  7E-11  3      -20     0.8             0.2             1                    1.2
              200        200             0.16  0.4  0.44  7E-11  3      -20     0.8             0.2             1                    1.2
              200        200             0.16  0.4  0.44  7E-11  3      -20     0.8             0.2             1                    1.3
              200        200             0.16  0.4  0.44  7E-11  3      -20     0.8             0.2             1                    1.4
              200        200             0.16  0.4  0.44  7E-11  3      -20     0.8             0.2             1                    1.5
              200        200             0.16  0.4  0.44  7E-11  3      -20     0.8             0.2             1                    1.6
          Factor None: Specifications=[MultiPoreWater]
            MultiPoreWater: Salb=0.15; SubProfileConductance=20; WaterTableDepth=10; CalculateInfiltration=true; CalculateDrainage=true; ReportDetail=false; IncludeSorption=true; CalculateEvaporation=true; CalculateDiffusion=true; DiffusivityMultiplier=2; ExtractionMultiplier=0; ProfileWaterExtraction=0; TotalCover=0; ResidueWater=0; Hour=0; ReportLayer=0; TimeStep=0
              Thickness  ParamThickness  LL15  DUL   SAT   CFlow  XFlow  PsiBub  MaxRepellentWC  MinRepellentWC  MinRepellancyFactor  BD
              30         30              0.16  0.44  0.44  7E-11  3      -20     0.8             0.2             1                    1
              170        170             0.16  0.44  0.44  7E-11  3      -20     0.8             0.2             1                    1
              200        200             0.16  0.44  0.44  7E-11  3      -20     0.8             0.2             1                    1.2
              200        200             0.16  0.44  0.44  7E-11  3      -20     0.8             0.2             1                    1.2
              200        200             0.16  0.44  0.44  7E-11  3      -20     0.8             0.2             1                    1.3
              200        200             0.16  0.44  0.44  7E-11  3      -20     0.8             0.2             1                    1.4
              200        200             0.16  0.44  0.44  7E-11  3      -20     0.8             0.2             1                    1.5
              200        200             0.16  0.44  0.44  7E-11  3      -20     0.8             0.2             1                    1.6
      Simulation BaseSoil
        Clock: StartDate=1999-01-01; EndDate=1999-12-31
        Weather: FileName=lincoln.met
        Summary SummaryFile
        Zone Field: Area=1; Slope=0
          Report: same as Sensibility.Irrigation.BaseIrrigation.Field.Report
          Fertiliser
          SurfaceOrganicMatter: same as Sensibility.Transpiration.BaseTranspiration.Field.SurfaceOrganicMatter
          MicroClimate: a_interception=0; b_interception=1; c_interception=0; d_interception=0; soil_albedo=0.3; sun_angle=15; soil_heat_flux_fraction=0.4; night_interception_fraction=0.5; refheight=2; albedo=0.15; emissivity=0.96; RadIntTotal=0
          Irrigation
          Manager Irrigate on a fixed date
            IrrigateDate = 1-feb
            Amount = 50
            Depth = 0
            Efficiency = 1
            WillRunoff = False
            Duration = 2
            script: same as in Sensibility.Repellency.BaseRepell.Field.Irrigate on a fixed date
          Soil: same as Validation.Residues.Base.Field.Soil
    Folder LayerMapping
      Simulation ModelMore
        Clock: StartDate=1998-09-01; EndDate=1999-08-31
        Weather: FileName=lincoln.met
        Summary SummaryFile
        SoilArbitrator Soil Arbitrator
        Zone Field: Area=1; Slope=0
          Fertiliser
          SurfaceOrganicMatter: same as Sensibility.Transpiration.BaseTranspiration.Field.SurfaceOrganicMatter
          MicroClimate: a_interception=0; b_interception=1; c_interception=0; d_interception=0; soil_albedo=0.3; sun_angle=15; soil_heat_flux_fraction=0.4; night_interception_fraction=0.5; refheight=2; albedo=0.15; emissivity=0.96; RadIntTotal=0
          Irrigation
          Manager ClimateControl: same as Sensibility.Transpiration.BaseTranspiration.Field.ClimateControl
          Plant Slurp: CropType=Slurp
          Manager SlurpSowingRule
            CultivarName = Pasture
            InitialRootDepth = 20
            SowDate = 5-Sep
```csharp
using System;
using Models.Core;
using Models.PMF;
using APSIM.Shared.Utilities;
        
namespace Models
{
	[Serializable] 
	[System.Xml.Serialization.XmlInclude(typeof(Model))]
	public class Script : Model
	{
		[Link] Plant Slurp;
		[Link] Clock Clock;
		[Link] Zone zone;
		[Display(DisplayType = DisplayAttribute.DisplayTypeEnum.CultivarName)]
		[Description("Cultivar")]
		public string CultivarName { get; set; }
		[Description("Initial Root Depth")]
		public double InitialRootDepth { get; set; }
		[Description("Sowing date (d-mmm)")]
		public string SowDate { get; set; }

               
		[EventSubscribe("DoManagement")]
		private void OnDoManagement(object sender, EventArgs e)
		{
			if (DateUtilities.WithinDates(SowDate, Clock.Today, SowDate))
			{
				//Slurp.Sow(cultivar: CultivarName, population: 1, depth: InitialRootDepth, rowSpacing: 150);
				//	object LeafPartFrac = 0.2;
				//	zone.Set("Slurp.Leaf.DMDemandFunction.PartitionFraction.Value", LeafPartFrac);
				//	object RootPartFrac = 0.8;
				//	zone.Set("Slurp.Root.PartitionFraction.Value", RootPartFrac);
			}
			//Potato.Sow(... Contains the following arguements:
			//Population  double  Optional  Seeds sowing/m2.  Default is zero
			//Cultivar    string  Required  "NameOfCultivar"
			//Depth       double  Optional  Depth (mm) seed sown.   Default is 100mm 
			//MaxCover    double  Optional  Proportion (0-1) of the ground row crop will cover.   Default is 1.0
			//BudNumber   double  Optional  Number of mainstems per seed sown.  Default is 1.0
			//RowSpacing  double  Optional  Spaceing (mm) between drill rows when crop is sown.  Default is 150mm
			//CropClass   string  Optional  Crop class to instantiate when crop is sown.  Default is "Plant"
		}
	}
}
```
          Soil: ASCOrder=Vertosol; ASCSubOrder=Black; SoilType=Clay; Site=Norwin; NearestTown=Norwin; Region=Darling Downs and Granite Belt; State=Queensland; Country=Australia; NaturalVegetation=Qld. Bluegrass, possible Qld. Blue gum; ApsoilNumber=900; Latitude=-27.581836; Longitude=151.320206; LocationAccuracy=+/- 20m
            DataSource=CSIRO Sustainable Ecosystems, Toowoomba; Characteriesd as part of the GRDC funded project"Doing it better, doing it smarter, managing soil water in Australian agriculture' 2011
            Comments=OC, CLL for all crops estimated-based on Bongeen Mywybilla Soil No1
            MultiPoreWater: Salb=0.15; SubProfileConductance=20; WaterTableDepth=10; CalculateInfiltration=true; CalculateDrainage=true; ReportDetail=false; IncludeSorption=true; CalculateEvaporation=true; CalculateDiffusion=true; DiffusivityMultiplier=2; ExtractionMultiplier=10; ProfileWaterExtraction=0; TotalCover=0; ResidueWater=0; Hour=0; ReportLayer=0; TimeStep=0
              Thickness  ParamThickness  LL15  DUL   SAT   CFlow  XFlow  PsiBub  MaxRepellentWC  MinRepellentWC  MinRepellancyFactor  BD
              30         30              0.16  0.3   0.44  7E-11  3      -20     0.8             0.2             1                    1
              170        170             0.15  0.3   0.44  7E-11  3      -20     0.8             0.2             1                    1
              200        200             0.14  0.28  0.46  7E-11  3      -70     0.8             0.2             1                    1.2
              200        200             0.14  0.28  0.46  7E-11  3      -70     0.8             0.2             1                    1.2
              200        200             0.14  0.26  0.36  7E-11  3      -70     0.8             0.2             1                    1.3
              200        200             0.14  0.26  0.36  7E-11  3      -70     0.8             0.2             1                    1.4
              200        200             0.14  0.26  0.36  7E-11  3      -70     0.8             0.2             1                    1.5
              200        200             0.14  0.26  0.36  7E-11  3      -70     0.8             0.2             1                    1.6
            Evapotranspiration
            MRSpline
            SoilNitrogen: fom_type=[default, manure, mucuna, lablab, shemp, stable]; fract_carb=[0.2, 0.3, 0.54, 0.57, 0.45, 0]; fract_cell=[0.7, 0.3, 0.37, 0.37, 0.47, 0.1]; fract_lign=[0.1, 0.4, 0.09, 0.06, 0.08, 0.9]; wfpsN2N2O_x=[22, 88]; wfpsN2N2O_y=[0.1, 1]
            SoilOrganicMatter: same as Validation.Residues.Base.Field.Soil.SoilOrganicMatter
            Analysis: Thickness=[200, 200, 200, 200, 200, 200, 200]; PH=[6, 6, 6, 6, 6, 6, 6]; PHUnits=Water; BoronUnits=HotWater
            Sample InitialN: NO3Units=ppm; NH4Units=ppm; SWUnits=Volumetric; OCUnits=Total; PHUnits=Water
              Thickness  NO3  NH4
              150        10   0.1
              150        10   0.1
              300        10   0.1
              300        10   0.1
              300        10   0.1
              300        1    0.1
              300        1    0.1
            Sample InitialWater: Thickness=[30, 170, 200, 200, 200, 200, 200, 200]; SW=[0.3, 0.3, 0.3, 0.3, 0.3, 0.3, 0.3, 0.3]; NO3Units=ppm; NH4Units=ppm; SWUnits=Volumetric; OCUnits=Total; PHUnits=Water
            ObservedSWLayering: Thickness=[200, 200, 200, 200, 200, 200, 200]
            LayerStructure
              Thickness=[30, 70, 50, 50, 50, 50, 50, 50, 50, 50, 50, 50, 50, 50, 50, 50, 50, 50, 50, 50, 50, 50, 50, 50, 50, 50, 50, 50]
            WEIRDO MultiPoreWater: Salb=0.15; SubProfileConductance=20; WaterTableDepth=10; CalculateInfiltration=true; CalculateDrainage=true; ReportDetail=false; IncludeSorption=true; CalculateEvaporation=true; CalculateDiffusion=true; DiffusivityMultiplier=2; ExtractionMultiplier=10; ProfileWaterExtraction=0; TotalCover=0; ResidueWater=0; Hour=0; ReportLayer=0; TimeStep=0
              Thickness  ParamThickness  LL15  DUL   SAT   CFlow  XFlow  PsiBub  MaxRepellentWC  MinRepellentWC  MinRepellancyFactor  BD
              30         30              0.16  0.3   0.44  7E-11  3      -20     0.8             0.2             1                    1
              170        170             0.15  0.3   0.44  7E-11  3      -20     0.8             0.2             1                    1
              200        200             0.14  0.28  0.46  7E-11  3      -70     0.8             0.2             1                    1.2
              200        200             0.14  0.28  0.46  7E-11  3      -70     0.8             0.2             1                    1.2
              200        200             0.14  0.26  0.36  7E-11  3      -70     0.8             0.2             1                    1.3
              200        200             0.14  0.26  0.36  7E-11  3      -70     0.8             0.2             1                    1.4
              200        200             0.14  0.26  0.36  7E-11  3      -70     0.8             0.2             1                    1.5
              200        200             0.14  0.26  0.36  7E-11  3      -70     0.8             0.2             1                    1.6
          Report: EventNames=[Clock].DoReport
            VariableNames:
              [Clock].Today
              [Soil].ObservedSWLayering.SW
      Simulation ModelFewer
        Clock: StartDate=1998-09-01; EndDate=1999-08-31
        Weather: FileName=lincoln.met
        Summary SummaryFile
        SoilArbitrator Soil Arbitrator
        Zone Field: Area=1; Slope=0
          Fertiliser
          SurfaceOrganicMatter: same as Sensibility.Transpiration.BaseTranspiration.Field.SurfaceOrganicMatter
          MicroClimate: a_interception=0; b_interception=1; c_interception=0; d_interception=0; soil_albedo=0.3; sun_angle=15; soil_heat_flux_fraction=0.4; night_interception_fraction=0.5; refheight=2; albedo=0.15; emissivity=0.96; RadIntTotal=0
          Irrigation
          Manager ClimateControl: same as Sensibility.Transpiration.BaseTranspiration.Field.ClimateControl
          Plant Slurp: CropType=Slurp
          Manager SlurpSowingRule: same as Sensibility.LayerMapping.ModelMore.Field.SlurpSowingRule
          Soil: ASCOrder=Vertosol; ASCSubOrder=Black; SoilType=Clay; Site=Norwin; NearestTown=Norwin; Region=Darling Downs and Granite Belt; State=Queensland; Country=Australia; NaturalVegetation=Qld. Bluegrass, possible Qld. Blue gum; ApsoilNumber=900; Latitude=-27.581836; Longitude=151.320206; LocationAccuracy=+/- 20m
            DataSource=CSIRO Sustainable Ecosystems, Toowoomba; Characteriesd as part of the GRDC funded project"Doing it better, doing it smarter, managing soil water in Australian agriculture' 2011
            Comments=OC, CLL for all crops estimated-based on Bongeen Mywybilla Soil No1
            MultiPoreWater: same as Sensibility.LayerMapping.ModelMore.Field.Soil.MultiPoreWater
            Evapotranspiration
            MRSpline
            SoilNitrogen: fom_type=[default, manure, mucuna, lablab, shemp, stable]; fract_carb=[0.2, 0.3, 0.54, 0.57, 0.45, 0]; fract_cell=[0.7, 0.3, 0.37, 0.37, 0.47, 0.1]; fract_lign=[0.1, 0.4, 0.09, 0.06, 0.08, 0.9]; wfpsN2N2O_x=[22, 88]; wfpsN2N2O_y=[0.1, 1]
            SoilOrganicMatter: same as Validation.Residues.Base.Field.Soil.SoilOrganicMatter
            Analysis: Thickness=[200, 200, 200, 200, 200, 200, 200]; PH=[6, 6, 6, 6, 6, 6, 6]; PHUnits=Water; BoronUnits=HotWater
            Sample InitialN: NO3Units=ppm; NH4Units=ppm; SWUnits=Volumetric; OCUnits=Total; PHUnits=Water
              Thickness  NO3  NH4
              150        10   0.1
              150        10   0.1
              300        10   0.1
              300        10   0.1
              300        10   0.1
              300        1    0.1
              300        1    0.1
            Sample InitialWater: Thickness=[30, 170, 200, 200, 200, 200, 200, 200]; SW=[0.3, 0.3, 0.3, 0.3, 0.3, 0.3, 0.3, 0.3]; NO3Units=ppm; NH4Units=ppm; SWUnits=Volumetric; OCUnits=Total; PHUnits=Water
            ObservedSWLayering: Thickness=[200, 200, 200, 200, 200, 200, 200]
            LayerStructure: Thickness=[30, 170, 400, 400, 400]
            WEIRDO MultiPoreWater: same as Sensibility.LayerMapping.ModelMore.Field.Soil.MultiPoreWater
          Report: EventNames=[Clock].DoReport
            VariableNames:
              [Clock].Today
              [Soil].ObservedSWLayering.SW
      Simulation BaseLayering
        Clock: StartDate=1998-09-01; EndDate=1999-08-31
        Weather: FileName=lincoln.met
        Summary SummaryFile
        SoilArbitrator Soil Arbitrator
        Zone Field: Area=1; Slope=0
          Report: EventNames=[Clock].DoReport
            VariableNames:
              [Clock].Today
              [Soil].ObservedSWLayering.SW
          Fertiliser
          SurfaceOrganicMatter: same as Sensibility.Transpiration.BaseTranspiration.Field.SurfaceOrganicMatter
          MicroClimate: a_interception=0; b_interception=1; c_interception=0; d_interception=0; soil_albedo=0.3; sun_angle=15; soil_heat_flux_fraction=0.4; night_interception_fraction=0.5; refheight=2; albedo=0.15; emissivity=0.96; RadIntTotal=0
          Irrigation
          Manager ClimateControl: same as Sensibility.Transpiration.BaseTranspiration.Field.ClimateControl
          Plant Slurp: CropType=Slurp
          Manager SlurpSowingRule: same as Sensibility.LayerMapping.ModelMore.Field.SlurpSowingRule
          Soil: ASCOrder=Vertosol; ASCSubOrder=Black; SoilType=Clay; Site=Norwin; NearestTown=Norwin; Region=Darling Downs and Granite Belt; State=Queensland; Country=Australia; NaturalVegetation=Qld. Bluegrass, possible Qld. Blue gum; ApsoilNumber=900; Latitude=-27.581836; Longitude=151.320206; LocationAccuracy=+/- 20m
            DataSource=CSIRO Sustainable Ecosystems, Toowoomba; Characteriesd as part of the GRDC funded project"Doing it better, doing it smarter, managing soil water in Australian agriculture' 2011
            Comments=OC, CLL for all crops estimated-based on Bongeen Mywybilla Soil No1
            MultiPoreWater: same as Sensibility.LayerMapping.ModelMore.Field.Soil.MultiPoreWater
            Evapotranspiration
            MRSpline
            SoilNitrogen: fom_type=[default, manure, mucuna, lablab, shemp, stable]; fract_carb=[0.2, 0.3, 0.54, 0.57, 0.45, 0]; fract_cell=[0.7, 0.3, 0.37, 0.37, 0.47, 0.1]; fract_lign=[0.1, 0.4, 0.09, 0.06, 0.08, 0.9]; wfpsN2N2O_x=[22, 88]; wfpsN2N2O_y=[0.1, 1]
            SoilOrganicMatter: same as Validation.Residues.Base.Field.Soil.SoilOrganicMatter
            Analysis: Thickness=[200, 200, 200, 200, 200, 200, 200]; PH=[6, 6, 6, 6, 6, 6, 6]; PHUnits=Water; BoronUnits=HotWater
            Sample InitialN: NO3Units=ppm; NH4Units=ppm; SWUnits=Volumetric; OCUnits=Total; PHUnits=Water
              Thickness  NO3  NH4
              150        10   0.1
              150        10   0.1
              300        10   0.1
              300        10   0.1
              300        10   0.1
              300        1    0.1
              300        1    0.1
            Sample InitialWater: Thickness=[30, 170, 200, 200, 200, 200, 200, 200]; SW=[0.3, 0.3, 0.3, 0.3, 0.3, 0.3, 0.3, 0.3]; NO3Units=ppm; NH4Units=ppm; SWUnits=Volumetric; OCUnits=Total; PHUnits=Water
            ObservedSWLayering: Thickness=[200, 200, 200, 200, 200, 200, 200]
            LayerStructure: Thickness=[30, 170, 200, 200, 200, 200, 200, 200]
            WEIRDO MultiPoreWater: same as Sensibility.LayerMapping.ModelMore.Field.Soil.MultiPoreWater
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