Simulations: Version=163
  Memo TitlePage
    # Evaluation of simulations of multi-species pasture

    _Rogerio Cichota, Plant and Food Research, New Zealand_

    ##Preamble
    Pastoral systems in New Zealand and around the world rely on a few managed plant species. Generally the swards comprise a grass species and may contain companion plants, as well as weeds. Thus pastures are typically composed of multiple species that compete but may also complement each other.  A very common managed sward is the grass-legume mix, with ryegrass-white clover being the prototypical mixture for subtropical and temperate grasslands.  Such combination of species is very successful due to synegies between the two species, with complementary growth patterns and the N fixation capability of white-clover.  However, the traditional ryegrass-white clover mixture can be succeptible to drought, has a very seasonal growth pattern, and typically has high N content in the green biomass which can lead to high levels of urinary N excreted by animals, a major source of N losses from pastoral grazing systems.
    The limitations of the traditional binary mixed pasture have led to increased interest in the use of alternative forage species, such as forbs, and on increasing the number of species in the sward. The importance of plant species diversity for enhancing ecosystem function has been debated by ecologists for some time (refs). The benefits include increased total biomass production, greater yield stability, improved soil quality and protection, improved water and nutrient use, among others.  However, the addition of alternative species can change the pasture’s seasonal growth pattern and the pattern will change with time as some species tend to become dominant and others are less persistant.
    Quantifying the performance of these alternative species when used in mixed swards and under different management is still an issue that needs further study .  Considering the limitation in scope and environmental conditions that can covered by experimentation, modelling must be an integral part of studying alternative and diverse pastures.

    **Objective:** Assemble and test a few combination of forage plant species in multi-species swards.  This will include comparison against experimental data and sensitivity analyses using simulatiopn that include species with current available forage models.

    ## Generic background
  Folder Replacements
    Manager ExtraVariables
```csharp
using System;
using System.Text;
using System.Linq;
using System.Xml.Serialization;
using System.Collections.Generic;
using Newtonsoft.Json;
using APSIM.Shared.Utilities;
using Models;
using Models.PMF;
using Models.Soils;
using Models.Core;
using Models.Climate;
using Models.Interfaces;
using Models.Soils.Nutrients;

namespace Models
{
    [Serializable] 
    public class Script : Model
    {
        [Link] private Clock Clock;
        [Link] private Zone myZone;
        [Link] private Weather Met;
        [Link] private Fertiliser Fert;
        [Link] private Irrigation Irrig;
        [Link] private ISummary mySummary;
        [Link] Models.Surface.SurfaceOrganicMatter SOM;
        [Link] Soils.Soil Soil;
        [Link(ByName = true)] private ISolute Urea;
        [Link(ByName = true)] private ISolute NO3;
        [Link(ByName = true)] private ISolute NH4;
        [Link(ByName = true)] private SoilNitrogen SoilNitrogen;
                    
        [JsonIgnore] public bool InitialDay { get; set; }
        [JsonIgnore] public double  InitialSoilOMN { get; set; }
        [JsonIgnore] public double  InitialSurfaceOMN { get; set; }
        [JsonIgnore] public double  InitialMineralN { get; set; }
        [JsonIgnore] public double AccumHarvestedWt { get; set; }
        [JsonIgnore] public double AccumHarvestedN { get; set; }
        [JsonIgnore] public double HerbageNConc { get; set; }

        private DateTime YearStartDate;
        private double yesterdayNconc;
        private List<Plant> PMFSpecies = new List<Plant>();
        private List<AgPasture.PastureSpecies> AgPSpecies = new List<AgPasture.PastureSpecies>();

        [EventSubscribe("StartOfSimulation")]
        private void OnSimulationCommencing(object sender, EventArgs e)
        {
            InitialDay = true;

            // set up the links to all plant species
            foreach (Plant species in myZone.FindAllChildren<Plant>().OfType<IModel>().ToList())
                PMFSpecies.Add(species);
            foreach (AgPasture.PastureSpecies species in myZone.FindAllChildren<AgPasture.PastureSpecies>().OfType<IModel>().ToList())
                AgPSpecies.Add(species);
        }

        [EventSubscribe("StartOfDay")]
        private void OnStartOfDay(object sender, EventArgs e)
        {
            double allDM = 0.0;
            double allN = 0.0;
            foreach (Plant species in myZone.FindAllChildren<Plant>().OfType<IModel>().ToList())
            {
                allDM += species.AboveGround.Wt;
                allN += species.AboveGround.N;
            }
            foreach (AgPasture.PastureSpecies species in myZone.FindAllChildren<AgPasture.PastureSpecies>().OfType<IModel>().ToList())
            {
                allDM += species.AboveGround.Wt*0.1;
                allN += species.AboveGround.N*0.1;
            }
            yesterdayNconc =  MathUtilities.Divide(allN, allDM, 0.0);
        }

        [EventSubscribe("DoManagement")]
        private void OnDoManagement(object sender, EventArgs e)
        {
            if (InitialDay == true)
            {
                InitialSurfaceOMN = SOM.N;
                InitialSoilOMN = MathUtilities.Sum(SoilNitrogen.FOMN)+MathUtilities.Sum(SoilNitrogen.MicrobialN)+MathUtilities.Sum(SoilNitrogen.HumicN);
                InitialMineralN = MathUtilities.Sum(Urea.kgha)+MathUtilities.Sum(NH4.kgha)+MathUtilities.Sum(NO3.kgha);
                InitialDay = false;

                // check whether we're in the north or south hemisphere
                if (Met.Latitude >= 0.0)
                    YearStartDate = DateTime.Parse("01/01/2000");
                else
                    YearStartDate = DateTime.Parse("01/07/2000");
            }

            HerbageNConc = yesterdayNconc;
        }
        
        [EventSubscribe("DoManagementCalculations")]
        private void OnDoManagementCalculations(object sender, EventArgs e)
        {
            //!!!!!! Plant Harvest !!!!!!
            if (Clock.Today.DayOfYear == YearStartDate.DayOfYear)
            {
                    AccumHarvestedWt = (double)myZone.Get("[DefoliationManager].Script.DefoliatedWt");
                    AccumHarvestedN = (double)myZone.Get("[DefoliationManager].Script.DefoliatedN");
            }
            else
            {
                    AccumHarvestedWt += (double)myZone.Get("[DefoliationManager].Script.DefoliatedWt");
                    AccumHarvestedN += (double)myZone.Get("[DefoliationManager].Script.DefoliatedN");
            }
        }
    }
}
```
  DataStore
    ExcelInput Observed: FileNames=[Observed.xlsx]; SheetNames=[Observed]
    ExcelInput ObservedMeans: FileNames=[Observed.xlsx]; SheetNames=[ObservedMeans]
    PredictedObserved: PredictedTableName=Report; ObservedTableName=Observed; FieldNameUsedForMatch=SimulationName; FieldName2UsedForMatch=Date; AllColumns=false
    PredictedObserved PredictedObservedMeans: PredictedTableName=Report; ObservedTableName=ObservedMeans; FieldNameUsedForMatch=SimulationName; FieldName2UsedForMatch=Date; AllColumns=false
  Folder Evaluation
    Memo Note
      Evaluating the performance of Apsim to simulate multi-species pasture swards against experiments conducted in New Zealand and Denmark.
    Folder NewZealand
      Experiment FRNLRuakuraMix1
        DisabledSimNames=[FRNLRuakuraNRate50, FRNLRuakuraNRate100, FRNLRuakuraNRate200, FRNLRuakuraNRate350]
        Memo
          ###FRNL Ruakura###

          This simulation setup was based on field trials performed at DairyNZ's Scott Farm, in Ruakura, New Zealand, between 2014 and 2016.  The experiment was part of the FRNL (Forages for Reduced Nitrogen Leaching) program and the data is basically unpublished (references will be added when they come about).  Here only plots with the "standard" mixed pasture species are used, this includes ryegrass and white clover (weeds also occured, but are not included in the simulation - the fraction of biomass was fairly small).
          The experiment consisted of six fertiliser treatments (nominally at N rates of 0, 50, 100, 200, 350 and 500 kg/ha/yr) in three replicates; actual amounts varied as fertiliser applications followed pasture harvests.  Measurements comprised yield, for each species, and quality indicators (here N content is used), for whole sward.
          Observed data supplied by Grant Edwards, Lincoln University.

          The soil at the experimental site was a Horotiu silt loam (an Orthic Allophanic soil; USDA: Typic Udivitrand), the parameters required were inferred using data from the New Zealand National Soils Database (Landcare Research).
          Weather data was obtained from nearby Ruakura weather station (NIWA).
          Simulation of ryegrass and lucerne are done using the AgPasture model as the PMF versions are still under development.
        Factors
          Factor NRate: Specification=[NRate]
            Operations 0
            Operations 50
              2014-12-22  [Fertiliser].Apply(Amount: 5, Type: Fertiliser.Types.UreaN, Depth: 10)
              2015-01-22  [Fertiliser].Apply(Amount: 5, Type: Fertiliser.Types.UreaN, Depth: 10)
              2015-03-10  [Fertiliser].Apply(Amount: 5, Type: Fertiliser.Types.UreaN, Depth: 10)
              2015-04-16  [Fertiliser].Apply(Amount: 5, Type: Fertiliser.Types.UreaN, Depth: 10)
              2015-05-21  [Fertiliser].Apply(Amount: 5, Type: Fertiliser.Types.UreaN, Depth: 10)
              2015-07-31  [Fertiliser].Apply(Amount: 5, Type: Fertiliser.Types.UreaN, Depth: 10)
              2015-09-16  [Fertiliser].Apply(Amount: 5, Type: Fertiliser.Types.UreaN, Depth: 10)
              2015-11-19  [Fertiliser].Apply(Amount: 5, Type: Fertiliser.Types.UreaN, Depth: 10)
              2015-12-17  [Fertiliser].Apply(Amount: 5, Type: Fertiliser.Types.UreaN, Depth: 10)
              2016-01-26  [Fertiliser].Apply(Amount: 5, Type: Fertiliser.Types.UreaN, Depth: 10)
              2016-03-09  [Fertiliser].Apply(Amount: 5, Type: Fertiliser.Types.UreaN, Depth: 10)
              2016-04-20  [Fertiliser].Apply(Amount: 5, Type: Fertiliser.Types.UreaN, Depth: 10)
              2016-06-13  [Fertiliser].Apply(Amount: 5, Type: Fertiliser.Types.UreaN, Depth: 10)
              2016-08-24  [Fertiliser].Apply(Amount: 5, Type: Fertiliser.Types.UreaN, Depth: 10)
              2016-09-30  [Fertiliser].Apply(Amount: 5, Type: Fertiliser.Types.UreaN, Depth: 10)
              2016-11-03  [Fertiliser].Apply(Amount: 5, Type: Fertiliser.Types.UreaN, Depth: 10)
            Operations 100
              2014-12-22  [Fertiliser].Apply(Amount: 10, Type: Fertiliser.Types.UreaN, Depth: 10)
              2015-01-22  [Fertiliser].Apply(Amount: 10, Type: Fertiliser.Types.UreaN, Depth: 10)
              2015-03-10  [Fertiliser].Apply(Amount: 10, Type: Fertiliser.Types.UreaN, Depth: 10)
              2015-04-16  [Fertiliser].Apply(Amount: 10, Type: Fertiliser.Types.UreaN, Depth: 10)
              2015-05-21  [Fertiliser].Apply(Amount: 10, Type: Fertiliser.Types.UreaN, Depth: 10)
              2015-07-31  [Fertiliser].Apply(Amount: 10, Type: Fertiliser.Types.UreaN, Depth: 10)
              2015-09-16  [Fertiliser].Apply(Amount: 10, Type: Fertiliser.Types.UreaN, Depth: 10)
              2015-11-19  [Fertiliser].Apply(Amount: 10, Type: Fertiliser.Types.UreaN, Depth: 10)
              2015-12-17  [Fertiliser].Apply(Amount: 10, Type: Fertiliser.Types.UreaN, Depth: 10)
              2016-01-26  [Fertiliser].Apply(Amount: 10, Type: Fertiliser.Types.UreaN, Depth: 10)
              2016-03-09  [Fertiliser].Apply(Amount: 10, Type: Fertiliser.Types.UreaN, Depth: 10)
              2016-04-20  [Fertiliser].Apply(Amount: 10, Type: Fertiliser.Types.UreaN, Depth: 10)
              2016-06-13  [Fertiliser].Apply(Amount: 10, Type: Fertiliser.Types.UreaN, Depth: 10)
              2016-08-24  [Fertiliser].Apply(Amount: 10, Type: Fertiliser.Types.UreaN, Depth: 10)
              2016-09-30  [Fertiliser].Apply(Amount: 10, Type: Fertiliser.Types.UreaN, Depth: 10)
              2016-11-03  [Fertiliser].Apply(Amount: 10, Type: Fertiliser.Types.UreaN, Depth: 10)
            Operations 200
              2014-12-22  [Fertiliser].Apply(Amount: 20, Type: Fertiliser.Types.UreaN, Depth: 10)
              2015-01-22  [Fertiliser].Apply(Amount: 20, Type: Fertiliser.Types.UreaN, Depth: 10)
              2015-03-10  [Fertiliser].Apply(Amount: 20, Type: Fertiliser.Types.UreaN, Depth: 10)
              2015-04-16  [Fertiliser].Apply(Amount: 20, Type: Fertiliser.Types.UreaN, Depth: 10)
              2015-05-21  [Fertiliser].Apply(Amount: 20, Type: Fertiliser.Types.UreaN, Depth: 10)
              2015-07-31  [Fertiliser].Apply(Amount: 20, Type: Fertiliser.Types.UreaN, Depth: 10)
              2015-09-16  [Fertiliser].Apply(Amount: 20, Type: Fertiliser.Types.UreaN, Depth: 10)
              2015-11-19  [Fertiliser].Apply(Amount: 20, Type: Fertiliser.Types.UreaN, Depth: 10)
              2015-12-17  [Fertiliser].Apply(Amount: 20, Type: Fertiliser.Types.UreaN, Depth: 10)
              2016-01-26  [Fertiliser].Apply(Amount: 20, Type: Fertiliser.Types.UreaN, Depth: 10)
              2016-03-09  [Fertiliser].Apply(Amount: 20, Type: Fertiliser.Types.UreaN, Depth: 10)
              2016-04-20  [Fertiliser].Apply(Amount: 20, Type: Fertiliser.Types.UreaN, Depth: 10)
              2016-06-13  [Fertiliser].Apply(Amount: 20, Type: Fertiliser.Types.UreaN, Depth: 10)
              2016-08-24  [Fertiliser].Apply(Amount: 20, Type: Fertiliser.Types.UreaN, Depth: 10)
              2016-09-30  [Fertiliser].Apply(Amount: 20, Type: Fertiliser.Types.UreaN, Depth: 10)
              2016-11-03  [Fertiliser].Apply(Amount: 20, Type: Fertiliser.Types.UreaN, Depth: 10)
            Operations 350
              2014-12-22  [Fertiliser].Apply(Amount: 35, Type: Fertiliser.Types.UreaN, Depth: 10)
              2015-01-22  [Fertiliser].Apply(Amount: 35, Type: Fertiliser.Types.UreaN, Depth: 10)
              2015-03-10  [Fertiliser].Apply(Amount: 35, Type: Fertiliser.Types.UreaN, Depth: 10)
              2015-04-16  [Fertiliser].Apply(Amount: 35, Type: Fertiliser.Types.UreaN, Depth: 10)
              2015-05-21  [Fertiliser].Apply(Amount: 35, Type: Fertiliser.Types.UreaN, Depth: 10)
              2015-07-31  [Fertiliser].Apply(Amount: 35, Type: Fertiliser.Types.UreaN, Depth: 10)
              2015-09-16  [Fertiliser].Apply(Amount: 35, Type: Fertiliser.Types.UreaN, Depth: 10)
              2015-11-19  [Fertiliser].Apply(Amount: 35, Type: Fertiliser.Types.UreaN, Depth: 10)
              2015-12-17  [Fertiliser].Apply(Amount: 35, Type: Fertiliser.Types.UreaN, Depth: 10)
              2016-01-26  [Fertiliser].Apply(Amount: 35, Type: Fertiliser.Types.UreaN, Depth: 10)
              2016-03-09  [Fertiliser].Apply(Amount: 35, Type: Fertiliser.Types.UreaN, Depth: 10)
              2016-04-20  [Fertiliser].Apply(Amount: 35, Type: Fertiliser.Types.UreaN, Depth: 10)
              2016-06-13  [Fertiliser].Apply(Amount: 35, Type: Fertiliser.Types.UreaN, Depth: 10)
              2016-08-24  [Fertiliser].Apply(Amount: 35, Type: Fertiliser.Types.UreaN, Depth: 10)
              2016-09-30  [Fertiliser].Apply(Amount: 35, Type: Fertiliser.Types.UreaN, Depth: 10)
              2016-11-03  [Fertiliser].Apply(Amount: 35, Type: Fertiliser.Types.UreaN, Depth: 10)
            Operations 500
              2014-12-22  [Fertiliser].Apply(Amount: 50, Type: Fertiliser.Types.UreaN, Depth: 10)
              2015-01-22  [Fertiliser].Apply(Amount: 50, Type: Fertiliser.Types.UreaN, Depth: 10)
              2015-03-10  [Fertiliser].Apply(Amount: 50, Type: Fertiliser.Types.UreaN, Depth: 10)
              2015-04-16  [Fertiliser].Apply(Amount: 50, Type: Fertiliser.Types.UreaN, Depth: 10)
              2015-05-21  [Fertiliser].Apply(Amount: 50, Type: Fertiliser.Types.UreaN, Depth: 10)
              2015-07-31  [Fertiliser].Apply(Amount: 50, Type: Fertiliser.Types.UreaN, Depth: 10)
              2015-09-16  [Fertiliser].Apply(Amount: 50, Type: Fertiliser.Types.UreaN, Depth: 10)
              2015-11-19  [Fertiliser].Apply(Amount: 50, Type: Fertiliser.Types.UreaN, Depth: 10)
              2015-12-17  [Fertiliser].Apply(Amount: 50, Type: Fertiliser.Types.UreaN, Depth: 10)
              2016-01-26  [Fertiliser].Apply(Amount: 50, Type: Fertiliser.Types.UreaN, Depth: 10)
              2016-03-09  [Fertiliser].Apply(Amount: 50, Type: Fertiliser.Types.UreaN, Depth: 10)
              2016-04-20  [Fertiliser].Apply(Amount: 50, Type: Fertiliser.Types.UreaN, Depth: 10)
              2016-06-13  [Fertiliser].Apply(Amount: 50, Type: Fertiliser.Types.UreaN, Depth: 10)
              2016-08-24  [Fertiliser].Apply(Amount: 50, Type: Fertiliser.Types.UreaN, Depth: 10)
              2016-09-30  [Fertiliser].Apply(Amount: 50, Type: Fertiliser.Types.UreaN, Depth: 10)
              2016-11-03  [Fertiliser].Apply(Amount: 50, Type: Fertiliser.Types.UreaN, Depth: 10)
        Simulation FRNLRuakuraMix1
          Clock: Start=2014-09-01; End=2016-12-31
          Weather: FileName=Ruakura.met
          Summary summaryfile
          SoilArbitrator Soil Arbitrator
          Forages
            Parameters:
              Name                          IsLive  DigestibilityString  FractionConsumable  MinimumAmount  UseDigestibilityFromModel
              SurfaceOrganicMatter.Residue  true    0.7                  1                   100            false
              SurfaceOrganicMatter.Residue  false   0.3                  1                   0              false
              AGPRyegrass.Leaf              true    0.7                  1                   100            false
              AGPRyegrass.Leaf              false   0.3                  1                   0              false
              AGPRyegrass.Stem              true    0.7                  1                   100            false
              AGPRyegrass.Stem              false   0.3                  1                   0              false
              AGPRyegrass.Stolon            true    0.7                  1                   100            false
              AGPRyegrass.Stolon            false   0.3                  1                   0              false
              AGPWhiteClover.Leaf           true    0.7                  1                   100            false
              AGPWhiteClover.Leaf           false   0.3                  1                   0              false
              AGPWhiteClover.Stem           true    0.7                  1                   100            false
              AGPWhiteClover.Stem           false   0.3                  1                   0              false
              AGPWhiteClover.Stolon         true    0.7                  1                   100            false
              AGPWhiteClover.Stolon         false   0.3                  1                   0              false
          Zone Field: Area=1; Slope=0; AspectAngle=0; Altitude=50
            Folder Management
              Operations Sowing
                2014-09-01  [AGPRyegrass].EndCrop()
                2014-09-01  [AGPWhiteClover].EndCrop()
                2014-11-15  [AGPRyegrass].Sow(population: 0, cultivar: "R", depth: 0, rowSpacing: 0)
                2014-11-15  [AGPWhiteClover].Sow(population: 0, cultivar: "R", depth: 0, rowSpacing: 0)
              Operations NRate
              Operations BaseFertiliser
                2014-10-13  [Fertiliser].Apply(Amount: 26.4, Type: Fertiliser.Types.UreaN, Depth: 10)
                2014-12-23  [Fertiliser].Apply(Amount: 3.9, Type: Fertiliser.Types.UreaN, Depth: 10)
              Manager DefoliationManager
                AutomaticManagementIsEnabled = False
                DefoliationRotationStartDate = 11/01/2014 00:00:00
                DefoliationRotationEndDate = 12/31/2100 00:00:00
                DefoliateType = Cut
                DefoliationTriggerType = TargetStandingBiomass
                IntervalBetweenDefoliations = 21
                TargetStandingBiomass = 200
                DurationOfEachDefoliation = 1
                RemoveAmountType = ResidualDM
                AmountForEachDefoliation = 150
                RemoveAllBiomassIsEnabled = False
                DMRemoveType = UserDefinedFraction
                FractionDMToRemove = 1
                NRemoveType = UserDefinedFraction
                FractionNToRemove = 1
                ReturnType = AsResidue
                NDungType = DefineCNratio
                CNRatioDung = 20
                UrineDepth = 250
                ProportionN2Dung = 0
```csharp
// Performs defoliations, or removes biomass, from any existing plant (PMF and/or AgPasture) based on a set of given rules.  
// Defoliations can be triggered automatically by this manager or be called from another Script or a Schedule model.
// Developed by RCichota, last updated in 31/Mar/2019

namespace Models
{
using Models.PMF.Interfaces;
using Models.Soils.Nutrients;
using System;
using System.Xml.Serialization;
using System.Collections.Generic;
using APSIM.Shared.Utilities;
using Models.Core;
using Models.Soils;
using Models.PMF;
using Models.Interfaces;
using Models.PMF.Interfaces;
using System.Linq;
using Newtonsoft.Json;
using Models.ForageDigestibility;

    [Serializable]
    public class Script : Model
    {
        [Link] private Clock clock;
        [Link] private Zone myZone;
        [Link] private Soil mySoil;
        [Link(ByName = true)] private ISolute Urea;
        [Link] private ISummary mySummary;
        [Link] private Forages forages;
        public event BiomassRemovedDelegate BiomassRemoved;
        private string baseDefoliationType;
        private string typeOfDefoliation;
        private string baseAmountType;
        private string typeOfAmount;
        private double amountGiven;
        private double herbageToRemove;

        private int durationOfDefoliation;
        private int daysDefoliating;
        private double cumAmountHarvested;
        private double atZ0;
        private double atZ1;
        private double fractionToRemove;
        private double fractionToResidue;
        private double speciesHarvestedWt;
        private double speciesHarvestedN;
        private double speciesFractionToRemove;
        [Link]
        private IPhysical soilPhysical;
        //> Links to other Apsim models
        //Auxiliary 'links'
        private List<Plant> PMFSpecies = new List<Plant>();
        private List<AgPasture.PastureSpecies> AgPSpecies = new List<AgPasture.PastureSpecies>();

        //> Events raised by this manager

        //> User inputs from properties tab
        [Separator("Generic defoliation management - removes biomass from PMF and AgPasture species, plus residue management")]
        [Description("Allow this manager to control defoliations? ")]
        public bool AutomaticManagementIsEnabled { get; set; }
        [Description("Date to start the defoliation management (dd/mm/yyyy): ")]
        public DateTime DefoliationRotationStartDate { get; set; }
        [Description("Date to end the defoliation management (dd/mm/yyyy): ")]
        public DateTime DefoliationRotationEndDate { get; set; }

        [Separator("Parameters defining how the defoliation is managed")]
        [Description("What type of defoliation should be triggered? ")]
        public DefoliationTypes DefoliateType { get; set; }
        [Description("How the defoliations should be triggered? ")]
        public DefoliationTriggerTypes DefoliationTriggerType { get; set; }
        [Description("  Minimum number of days between defoliations, used if trigger is an interval: ")]
        public int IntervalBetweenDefoliations { get; set; }
        [Description("  Minimum standing biomass to start defoliations, used if trigger is DM target(g/m2): ")]
        public int TargetStandingBiomass { get; set; }
        [Description("Duration of each defoliation event (days): ")]
        public int DurationOfEachDefoliation { get; set; }
        [Description("Which amount is being defined? ")]
        public DefoliateAmountTypes RemoveAmountType { get; set; }
        [Description("DM amount to use (g/m2): ")]
        public double AmountForEachDefoliation { get; set; }
        [Description("For PMF species, allow all biomass to be removed? ")]
        public bool RemoveAllBiomassIsEnabled { get; set; }

        [Separator("Parameters defining the management of the defoliated biomass")]
        [Description("How much of the DM defoliated is to be removed from the field? ")]
        public DMRemovalTypes DMRemoveType { get; set; }
        [Description("  Fraction of DM to remove off field, if using UserDefinedFraction (0-1): ")]
        public double FractionDMToRemove { get; set; }
        [Description("How much of the N defoliated is to be removed from the field? ")]
        public NRemovalTypes NRemoveType { get; set; }
        [Description("  Fraction of N to remove off field, if using UserDefinedFraction (0-1): ")]
        public double FractionNToRemove { get; set; }
        [Description("How the non-removed material is returned to the field? ")]
        public ReturnAsTypes ReturnType { get; set; }

        [Separator("Parameters for partitioning non-removed N into urine and dung")]
        [Description("How the partition of N to dung and urine is defined? ")]
        public DungNContentTypes NDungType { get; set; }
        [Description("  Proportion of N returned in dung, if using DefineProportion (0-1): ")]
        public double ProportionN2Dung { get; set; }
        [Description("  The C:N of dung, if using DefineCNratio (typically around 20): ")]
        public double CNRatioDung { get; set; }
        [Description("Soil depth down to which urine should be applied (mm): ")]
        public double UrineDepth { get; set; }

        //> Outputs from this manager
        [JsonIgnore][Units("g/m2")] // Pasture DM defoliated (removed from plants) today
        public double DefoliatedWt{ get; set; }
        [JsonIgnore][Units("g/m2")] // N in the pasture material defoliated today
        public double DefoliatedN{ get; set; }
        [JsonIgnore][Units("g/m2")] // Pasture DM harvested (removed from plants minus direct residue) today
        public double HarvestedWt{ get; set; }
        [JsonIgnore][Units("g/m2")] // N in the pasture material harvested today
        public double HarvestedN{ get; set; }
        [JsonIgnore][Units("g/m2")] // Pasture DM actually removed from the field
        public double RemovedWt{ get; set; }
        [JsonIgnore][Units("g/m2")] // N in the pasture material removed from the field
        public double RemovedN{ get; set; }
        [JsonIgnore][Units("g/m2")] // Pasture DM returned by this manager to the field
        public double ReturnedWt{ get; set; }
        [JsonIgnore][Units("g/m2")] // N in the pasture material returned by this manager to the field
        public double ReturnedN{ get; set; }
        [JsonIgnore][Units("g/m2")] // Non-removed N returned as dung (to SurfaceOM)
        public double NReturnedInDung{ get; set; }
        [JsonIgnore][Units("g/m2")] // Non-removed N returned as urine (soil urea)
        public double NReturnedInUrine{ get; set; }
        [JsonIgnore][Units("days")] // Number of days since the end of last defoliation event
        public int DaysSinceLastDefoliation{ get; set; }
        [JsonIgnore][Units("g/m2")] // Total standing aboveground DM before a defoliation
        public double PreHarvestDM{ get; set; }
        [JsonIgnore][Units("g/m2")] // Total standing aboveground DM after a defoliation
        public double PostHarvestDM{ get; set; }
        [JsonIgnore][Units("g/m2")] // Total pasture DM harvested over a complete defoliation event
        public double RotationHarvestedDM{ get; set; }

        //> Internal variables
        private double[] urineFraction;                  // fraction of urine to be applied in each soil layer
        // auxiliary boolean
        private bool aDefoliationHasHappened = false; // flag whether a defoliation has happened in this simulation run

        // auxiliary - lists of species and removal fractions
        private string[] swardSpeciesName;              // name of each species in the sward
        private string[] swardSpeciesType;              // type of each species in the sward (PMF or AgPasture)
        private double[] speciesFraction;              // biomass fraction of harvestable material of each species

        [EventSubscribe("StartOfSimulation")]
        private void OnSimulationCommencing(object sender, EventArgs e)
        {
            // check the type of defoliation given
            if (DefoliateType == DefoliationTypes.Cut)
                baseDefoliationType = "Cut";
            else if (DefoliateType == DefoliationTypes.Graze)
                baseDefoliationType = "Graze";
            else
                baseDefoliationType = "Harvest";

            // check the type of amount given
            if (RemoveAmountType == DefoliateAmountTypes.DMToRemove)
                baseAmountType = "DMToRemove";
            else if (RemoveAmountType == DefoliateAmountTypes.ResidualDM)
                baseAmountType = "ResidualDM";
            else
                baseAmountType = "UseDefoliationFractions";

            // check the interval between events
            if (IntervalBetweenDefoliations < 1)
                throw new Exception("The interval between defoliation events must be at least one day");

            // check the duration for each defoliation
            if(DurationOfEachDefoliation <= 0)
                throw new Exception("The duration of defoliations cannot be zero or negative!");

            // check the fraction of defoliated material to remove from the field
            if (DMRemoveType == DMRemovalTypes.RemoveAll)
                FractionDMToRemove = 1.0;
            else if (DMRemoveType == DMRemovalTypes.RemoveNone)
                FractionDMToRemove = 0.0;
            else if (DMRemoveType == DMRemovalTypes.BasedOnDigestibility)
                FractionDMToRemove = -1.0;  // will be calculated dynamically
            else // DMRemoveType == DMRemovalTypes.UserDefinedFraction
            {
                if (FractionDMToRemove < 0.0)
                    throw new Exception("The fraction of DM defoliated to remove from the field cannot be negative!");
            }

            // check the fraction of defoliated N to remove from the field
            if (NRemoveType == NRemovalTypes.RemoveAll)
                FractionNToRemove = 1.0;
            else if (NRemoveType == NRemovalTypes.RemoveNone)
                FractionNToRemove = 0.0;
            else if (NRemoveType == NRemovalTypes.ProportionalToDM)
                FractionNToRemove = FractionDMToRemove;
            else // NRemoveType == NRemovalTypes.UserDefinedFraction
            {
                if (FractionNToRemove < 0.0)
                    throw new Exception("The fraction of defoliated N to remove from the field cannot be negative!");
            }

            // set up the links to all plant species
            PMFSpecies = myZone.FindAllChildren<Plant>().ToList();
            AgPSpecies = myZone.FindAllChildren<AgPasture.PastureSpecies>().ToList();

            int numPlants = PMFSpecies.Count + AgPSpecies.Count;
            swardSpeciesName = new string[numPlants];
            swardSpeciesType = new string[numPlants];
            int i = 0;
            foreach (Plant species in myZone.FindAllChildren<Plant>().OfType<IModel>().ToList())
            {
                swardSpeciesName[i] = species.Name;
                swardSpeciesType[i] = "PMF";
                i += 1;
            }
            foreach (AgPasture.PastureSpecies species in myZone.FindAllChildren<AgPasture.PastureSpecies>().OfType<IModel>().ToList())
            {
                swardSpeciesName[i] = species.Name;
                swardSpeciesType[i] = "AgPasture";
                i += 1;
            }

            // initialise some variables
            speciesFraction = new double[numPlants];
            
            DaysSinceLastDefoliation = 0;
            durationOfDefoliation = -1;
            daysDefoliating = 0;
            resetMyOutputs();

            // set the fraction of urine for each layer
            if (ReturnType == ReturnAsTypes.AsDungUrine)
            {
                double depthFromSurface = 0.0;
                for (int layer = 0; layer < soilPhysical.Thickness.Length; layer++)
                {
                    depthFromSurface += soilPhysical.Thickness[layer];
                    if (depthFromSurface >= UrineDepth)
                    { // bottom layer found
                        urineFraction = new double[layer + 1];
                        double distFactor = 1.5;
                        double totalProp = UrineDepth * Math.Pow(1.0, distFactor) / (distFactor + 1.0);
                        depthFromSurface = 0.0;
                        atZ1 = (UrineDepth - depthFromSurface) * Math.Pow(1.0 - depthFromSurface / UrineDepth, distFactor) / (distFactor + 1.0);
                        for (int z = 0; z < layer+1; z++)
                        {
                            atZ0 = atZ1;
                            depthFromSurface += soilPhysical.Thickness[z];
                            atZ1 = (UrineDepth - depthFromSurface) * Math.Pow(1.0 - depthFromSurface / UrineDepth, distFactor) / (distFactor + 1);
                            if (1.0 - (depthFromSurface / UrineDepth) < 0.0)
                                atZ1 = 0;
                            urineFraction[z] = (atZ0 - atZ1) / totalProp;
                        }
                        layer = soilPhysical.Thickness.Length;
                    }
                }
            }

            // write message in summary
            mySummary.WriteMessage(this," Automatic defoliation manager initialised", MessageType.Diagnostic);
            if (AutomaticManagementIsEnabled)
            {
                mySummary.WriteMessage(this, "   Defoliations will happen between " + DefoliationRotationStartDate.ToShortDateString()
                                          + " and " + DefoliationRotationEndDate.ToShortDateString() + ".", MessageType.Diagnostic);
                mySummary.WriteMessage(this, "   Biomass from the sward will be defoliated simulating a \"" + baseDefoliationType + "\" rotation.", MessageType.Diagnostic);
                if (DefoliationTriggerType == DefoliationTriggerTypes.TargetStandingBiomass)
                    mySummary.WriteMessage(this, "   Events will happen whenever aboveground biomass surpasses " + TargetStandingBiomass.ToString("#0.0") + " g/m2.", MessageType.Diagnostic);
                else
                    mySummary.WriteMessage(this, "   Events will happen every " + IntervalBetweenDefoliations + " days, if there is enough biomass.", MessageType.Diagnostic);
                if(baseAmountType == "ResidualDM")
                    mySummary.WriteMessage(this, "   Removing biomass down to a residual amount of " + AmountForEachDefoliation.ToString("#.0") + " g/m2 over " 
                                             + DurationOfEachDefoliation + " days.", MessageType.Diagnostic);
                else
                    mySummary.WriteMessage(this, "   Removing " + AmountForEachDefoliation.ToString("#.0") + " g/m2 of biomass per day over " 
                                             + DurationOfEachDefoliation + " days.", MessageType.Diagnostic);
            }
            else
            {
                mySummary.WriteMessage(this,"   Automatic defoliations are currently disabled, though defoliations can be triggered by another manager", MessageType.Diagnostic);
                mySummary.WriteMessage(this,"   If called, the manager will remove biomass from the sward simulating a \"" + baseDefoliationType + "\" event.", MessageType.Diagnostic);
            }

            if(ReturnType == ReturnAsTypes.AsDungUrine)
            {
                mySummary.WriteMessage(this,"   Non-removed material will be returned as dung and urine. Urine added to soil according to proportions: "
                + string.Join(", ",urineFraction), MessageType.Diagnostic);
            }
            else
                mySummary.WriteMessage(this,"   Non-removed material will be returned as residue.", MessageType.Diagnostic);
        }

        [EventSubscribe("DoManagement")]
        private void OnDoManagement(object sender, EventArgs e)
        {
            // check whether we need to continue defoliationg, i.e. within a multi-day defoliation event (need to check this first in the day)
            if ((daysDefoliating > 0) && (daysDefoliating < durationOfDefoliation))
            {
                // reset outputs
                resetMyOutputs();

                // re-check the amount to defoliate
                double harvestableBiomass = harvestableSwardBiomass("All", "Harvestable");
                if (typeOfAmount == "DMToRemove")
                {
                    if(harvestableBiomass > 0.001)
                        herbageToRemove = Math.Min(harvestableBiomass, (amountGiven - cumAmountHarvested) / (durationOfDefoliation - daysDefoliating));
                }
                else if (typeOfAmount == "ResidualDM")
                {
                    double currentDM = standingSwardBiomassWt;
                    if (currentDM > amountGiven)
                        herbageToRemove = Math.Min(harvestableBiomass, (currentDM - amountGiven) / (durationOfDefoliation - daysDefoliating));
                }

                // remove plant biomass and return residue
                if (Math.Abs(herbageToRemove) >= 0.001)
                {
                    // set biomass removal
mySummary.WriteMessage(this, "   Defoliation initialised on DoManagement - " + clock.Today.Date.ToShortDateString(), MessageType.Diagnostic);
                    defoliateSward(herbageToRemove, typeOfDefoliation);

                    // return residue or excreta
                    if(ReturnedWt + ReturnedN > 0.0)
                    {
                        if (ReturnType == ReturnAsTypes.AsResidue)
                            returnResidues();
                        else
                            returnExcreta();
                    }

                    // gather amount removed this event
                    cumAmountHarvested += HarvestedWt;
                }

                daysDefoliating += 1;
            }

            // check whether a defoliation ended yesterday
            if (daysDefoliating < 0)
            { // clean up variables
                resetMyOutputs();
                daysDefoliating = 0;
            }

            // check whether automatic defoliations are enabled
            if (AutomaticManagementIsEnabled)
            {
                // check whether we are within the period in which defoliations can happen
                if ((clock.Today.Date >= DefoliationRotationStartDate.Date) && (clock.Today.Date <= DefoliationRotationEndDate.Date))
                {
                    if (clock.Today.Date == DefoliationRotationStartDate.Date)
                        DaysSinceLastDefoliation = IntervalBetweenDefoliations;

                    // check whether we should start a defoliation event
                    if (DefoliationTriggerType == DefoliationTriggerTypes.FixedInterval)
                    {
                        if (DaysSinceLastDefoliation == IntervalBetweenDefoliations)
                            Defoliate(baseDefoliationType, AmountForEachDefoliation, baseAmountType, DurationOfEachDefoliation);
                    }
                    else if (DefoliationTriggerType == DefoliationTriggerTypes.TargetInterval)
                    {
                        if (DaysSinceLastDefoliation >= IntervalBetweenDefoliations)
                            Defoliate(baseDefoliationType, AmountForEachDefoliation, baseAmountType, DurationOfEachDefoliation);
                    }
                    else  //DefoliationTriggerType == DefoliationTriggerTypes.TargetStandingBiomass
                    {
                        if (standingSwardBiomassWt >= TargetStandingBiomass)
                            Defoliate(baseDefoliationType, AmountForEachDefoliation, baseAmountType, DurationOfEachDefoliation);
                    }
                }
                //// Note: Only the code above, responsible for triggering automatic events, is limited by 'AutomaticManagementIsEnabled'. 
                ////       The rest of the code is still available to perform one-off defoliations.
                ////       It can be called from another manager or a schedulle thingy via Defoliate().
            }
        }

        [EventSubscribe("DoManagementCalculations")]
        private void OnDoManagementCalculations(object sender, EventArgs e)
        {
            // check whether a defoliation event has just been completed
            if (daysDefoliating == durationOfDefoliation)
            {
                // get amount of biomass remaining and zero counters
                PostHarvestDM = standingSwardBiomassWt;
                RotationHarvestedDM = cumAmountHarvested;
                aDefoliationHasHappened = true;
                daysDefoliating = -1;
            }

            // count the days after a defoliation
            if (aDefoliationHasHappened && (daysDefoliating == 0))
                DaysSinceLastDefoliation += 1;
        }

        /// <summary>Sets up a defoliation event.</summary>
        /// <param name="defoliationType">Type of defoliation (cut, graze, or harvest)</param>
        /// <param name="amountDM">Amount of biomass to use (g/m2)</param>
        /// <param name="amountType">How the DM amount is interpreted (toRemove, residual)</param>
        /// <param name="duration">Number of days to defoliate over</param>
        public void Defoliate(string defoliationType, double amountDM, string amountType, int duration)
        {
            // check whether there are plants in the sward that can be defoliated
            if (swardHasLivingPlants)
            {
                // check the defoliation type
                if (defoliationType.ToLower() == "cut")
                    typeOfDefoliation = "Cut";
                else if (defoliationType.ToLower() == "graze")
                    typeOfDefoliation = "Graze";
                else if (defoliationType.ToLower() == "harvest")
                    typeOfDefoliation = "Harvest";
                else
                    throw new Exception("Defoliation type should be either \"Cut\", \"Graze\", or \"Harvest\"!");

                // check DM amount given
                if (amountDM < 0.0)
                    throw new Exception("Amount to defoliate cannot be negative!");
                else
                    amountGiven = amountDM;

                // check the type of amount given
                if (amountType.ToLower() == "dmtoremove")
                    typeOfAmount = "DMToRemove";
                else if (amountType.ToLower() == "residualdm")
                    typeOfAmount = "ResidualDM";
                else if (amountType.ToLower() == "usedefoliationfractions")
                    typeOfAmount = "UseDefoliationFractions";
                else
                    throw new Exception("Amount type should be \"DMToRemove\", \"ResidualDM\", or \"UseDefoliationFractions\"!");

                // check duration given
                if (duration <= 0)
                    throw new Exception("Duration of defoliation cannot be zero or negative!");
                else
                    durationOfDefoliation = duration;

                // check existing biomass and amount to remove
                PreHarvestDM = standingSwardBiomassWt;
                herbageToRemove = 0.0;
                double harvestableBiomass = harvestableSwardBiomass("All", "Harvestable");
                if (typeOfAmount == "UseDefoliationFractions")
                { // amount given is ignored, removal based on fractions
                    amountGiven = 0.0;
                    if (harvestableBiomass > 0.0)
                        herbageToRemove = -1.0;

                    mySummary.WriteMessage(this, "   Defoliation triggered, removing biomass using the removal fractions (set or default), during " + durationOfDefoliation + " days", MessageType.Diagnostic);
                }
                else if (typeOfAmount == "DMToRemove")
                {
                    if (amountGiven > 0.001)
                    { // a meaningful amount was given, check whether all can be removed
                        if (harvestableBiomass > 0.001)
                            herbageToRemove = Math.Min(harvestableBiomass, amountGiven / durationOfDefoliation);

                        mySummary.WriteMessage(this, "   Defoliation triggered, attempting to remove " + amountGiven.ToString("#0.0") + " g/m2 of biomass over " + durationOfDefoliation + " days", MessageType.Diagnostic);
                    }
                }
                else if (typeOfAmount == "ResidualDM")
                {
                    // check how much biomass will be removed
                    if (PreHarvestDM > amountGiven)
                        herbageToRemove = Math.Min(harvestableBiomass, (PreHarvestDM - amountGiven) / durationOfDefoliation);

                    mySummary.WriteMessage(this, "   Defoliation triggered, attempting to remove biomass down to " + amountGiven.ToString("#0.0") + " g/m2 over " + durationOfDefoliation + " days", MessageType.Diagnostic);
                }

                // can defoliation begin?
                if (Math.Abs(herbageToRemove) >= 0.001)
                {
                    // set off first defoliation
mySummary.WriteMessage(this, "   Defoliation initialised on Defoliate - " + clock.Today.Date.ToShortDateString(), MessageType.Diagnostic);
                    defoliateSward(herbageToRemove, typeOfDefoliation);

                    // return residue or excreta
                    if(ReturnedWt + ReturnedN > 0.0)
                    {
                        if (ReturnType == ReturnAsTypes.AsResidue)
                            returnResidues();
                        else
                            returnExcreta();
                    }

                    // gather values for this event
                    cumAmountHarvested = HarvestedWt;
                    daysDefoliating = 1;
                    DaysSinceLastDefoliation = 0;
                }
                else
                {
                    // abort command as there is not enough biomass, check interval type
                    if (DefoliationTriggerType == DefoliationTriggerTypes.FixedInterval)
                    { // count the event as if it did happen
                        cumAmountHarvested = 0.0;
                        daysDefoliating = 1;
                        DaysSinceLastDefoliation = 0;
                    }

                    mySummary.WriteMessage(this, "   Defoliation did not happend because current biomass (" + PreHarvestDM.ToString("#0.0") + " g/m2) is too low (total harvestable = " + harvestableBiomass.ToString("#0.0") + " g/m2)", MessageType.Diagnostic);
                }
            }
            else
            {
                mySummary.WriteMessage(this, "   Defoliation did not happend because there is no growing plants in the sward", MessageType.Diagnostic);
            }
        }

        /// <summary>Resets the values of outputs.</summary>
        private void resetMyOutputs()
        {
            DefoliatedWt = 0.0;
            DefoliatedN = 0.0;
            HarvestedWt = 0.0;
            HarvestedN = 0.0;
            RemovedWt = 0.0;
            RemovedN = 0.0;
            ReturnedWt = 0.0;
            ReturnedN = 0.0;
            NReturnedInDung = 0.0;
            NReturnedInUrine = 0.0;
            RotationHarvestedDM = 0.0;
        }

        /// <summary>Flags whether there is any living plant in the sward.</summary>
        private bool swardHasLivingPlants
        {
            get
            {
                bool result = false;
                foreach (Plant species in PMFSpecies)
                       result |= species.IsAlive;
                foreach (AgPasture.PastureSpecies species in AgPSpecies)
                       result |= species.IsAlive;
                return result;
            }
        }

        /// <summary>Amount of plant biomass aboveground (g/m2).</summary>
        private double standingSwardBiomassWt
        {
            get
            {
                double result = 0.0;
                foreach (Plant species in PMFSpecies)
                   result += (double)myZone.Get(species.Name+".AboveGround.Wt");
                foreach (AgPasture.PastureSpecies species in AgPSpecies)
                    result += species.Standing.Wt*0.1;
                return result;
            }
        }

        /// <summary>Amount of N in plant's biomass aboveground (g/m2).</summary>
        private double standingSwardBiomassN
        {
            get
            {
                double result = 0.0;
                foreach (Plant species in PMFSpecies)
                   result += (double)myZone.Get(species.Name+".AboveGround.N");
                foreach (AgPasture.PastureSpecies species in AgPSpecies)
                    result += species.Standing.N*0.1;
                return result;
            }
        }

        /// <summary>Amount of plant biomass from all organs available for defoliation (g/m2).</summary>
        /// <remarks>Assumes that organs with a BiomassRemoval.FractionToRemove > 0 are harvestable.
        /// For AgPasture, harvestable is based on minimum DM.</remarks>
        /// <param name="plantName">The name of the plant to retrieve its biomass</param>
        /// <param name="fractionType">The type of fraction to use (harvestable or total)</param>
        private double harvestableSwardBiomass(string plantName, string fractionType)
        {
            double amountWt = 0.0;
            double fraction = 0.0;
        	foreach (var forage in forages.ModelsWithDigestibleBiomass)
        	{
        		if (plantName == "All" || forage.Name == plantName)
        		{
		    		foreach (var material in forage.Material) 
		    		{
		    			if (fractionType == "Total")
		    				amountWt += material.Total.Wt;
		    			else
		    				amountWt += material.Consumable.Wt;
					}
				}
			}
			
            return amountWt;
        }

        /// <summary>Triggers the actual biomass removal and gather DM and N amounts.</summary>
        /// <param name="amountToRemove">The total DM amount to remove (g/m2)</param>
        /// <param name="removalType">The type of removal (Cut, Graze, Harvest)</param>
        private void defoliateSward(double amountToRemove, string removalType)
        {
            // get the amounts of biomass and N before today's defoliation
            double preRemovalDM = standingSwardBiomassWt;
            double preRemovalN = standingSwardBiomassN;
            double fractionToRemove = 0.0;

            // gather the actual biomass removal fractions, checking whether they need to be adjusted
            double totalHarvestableAmount = harvestableSwardBiomass("All", "Harvestable");
            if (amountToRemove > 0.0)
            { // an amount was given for defoliation, adjust removal fractions for each species in order to remove the amount specified
                fractionToRemove = amountToRemove / totalHarvestableAmount;
            }
            else if (amountToRemove < 0.0)
            { // defoliation is not based on an amount, removal is determined simply by the removal fractions
                fractionToRemove = 1.0;
            }

            for (int i = 0; i < swardSpeciesName.Length; i++)
            {
                speciesFraction[i] = harvestableSwardBiomass(swardSpeciesName[i], "Harvestable") / totalHarvestableAmount;
                if (swardSpeciesType[i] == "PMF")
                {
                    // check whether the plant is alive
                    bool speciesIsAlive = (bool)myZone.Get(swardSpeciesName[i]+".IsEmerged");
                    if (speciesIsAlive)
                    {
                        // set removal fractions (these overrides the default removals in the plant)
                        setRemoveFraction(swardSpeciesName[i], fractionToRemove);

                        // do the actual biomass removal
                        foreach (Plant species in PMFSpecies)
                        {
                            if(species.Name == swardSpeciesName[i])
                            {

                                break;
                            }
                        }
                    }
                }
                else
                {
                    // check whether the plant is alive
                    bool speciesIsAlive = (bool)myZone.Get(swardSpeciesName[i]+".IsAlive");
                    if (speciesIsAlive)
                    {
                        // set removal amount (needs to be in kg/ha)
                        double amountRequired = (double)myZone.Get(swardSpeciesName[i]+".Harvestable.Wt");
                        if (amountToRemove > 0.0)
                            amountRequired = amountToRemove * speciesFraction[i] * 10.0;

                        // do the actual biomass removal
                        foreach (AgPasture.PastureSpecies species in AgPSpecies)
                        {
                            if(species.Name == swardSpeciesName[i])
                            {
                                species.RemoveBiomass(amount: amountRequired, type: "SetRemoveAmount");
                                break;
                            }
                        }
                    }
                }
            }

            // get the amounts of biomass and N after today's defoliation
            double postRemovalDM = standingSwardBiomassWt;
            double postRemovalN = standingSwardBiomassN;

            // get total defoliation (total plant stuff lost)
            DefoliatedWt = preRemovalDM - postRemovalDM;
            DefoliatedN = preRemovalN - postRemovalN;

            // get amounts harvested, removed, and returned
            manageDefoliatedBiomass();
        }

        /// <summary>Sets the biomass removal fractions for PMF plants.</summary>
        /// <param name="plantName">The name of PMF species</param>
        /// <param name="fractionHarvestable">The fraction of harvestable biomass to be removed (0-1)</param>
        private void setRemoveFraction(string plantName, double fractionHarvestable)
        {
            /*foreach (Plant species in PMFSpecies)
            {
                if ((species.Name == plantName) && (species.IsAlive))
                {

                    // set removal fractions (these overrides the default removals in the plant)
                    foreach (IOrgan organ in species.FindAllChildren<IOrgan>().OfType<IModel>().ToList())
                    {
                        // first get the removal for Live material
                        fractionToRemove = (double)myZone.Get(species.Name + "." + organ.Name + ".BiomassRemovalDefaults." + typeOfDefoliation + ".FractionLiveToRemove");
                        if (RemoveAllBiomassIsEnabled && (fractionToRemove > 0.0))
                            fractionToRemove = 0.95;
                        fractionToRemove = fractionHarvestable * fractionToRemove;
                        fractionToRemove = Math.Min(1.0, fractionToRemove);
                        defoliationFractions.SetFractionToRemove(organ.Name, fractionToRemove, "Live");
                        if (RemoveAllBiomassIsEnabled)
                            fractionToResidue = 0.0;
                        else
                            fractionToResidue = (double)myZone.Get(species.Name + "." + organ.Name + ".BiomassRemovalDefaults." + typeOfDefoliation + ".FractionLiveToResidue");
                        fractionToResidue = Math.Min(fractionHarvestable * fractionToResidue, 1.0 - fractionToRemove);
                        defoliationFractions.SetFractionToResidue(organ.Name, fractionToResidue, "Live");

                        // then get the removal for Dead material
                        fractionToRemove = (double)myZone.Get(species.Name + "." + organ.Name + ".BiomassRemovalDefaults." + typeOfDefoliation + ".FractionDeadToRemove");
                        if (RemoveAllBiomassIsEnabled && (fractionToRemove > 0.0))
                            fractionToRemove = 0.95;
                        fractionToRemove = fractionHarvestable * fractionToRemove;
                        fractionToRemove = Math.Min(1.0, fractionToRemove);
                        defoliationFractions.SetFractionToRemove(organ.Name, fractionToRemove, "Dead");
                        if (RemoveAllBiomassIsEnabled)
                            fractionToResidue = 0.0;
                        else
                            fractionToResidue = (double)myZone.Get(species.Name + "." + organ.Name + ".BiomassRemovalDefaults." + typeOfDefoliation + ".FractionDeadToResidue");
                        fractionToResidue = Math.Min(fractionHarvestable * fractionToResidue, 1.0 - fractionToRemove);
                        defoliationFractions.SetFractionToResidue(organ.Name, fractionToResidue, "Dead");
                    }
                }
            }*/
        }

        /// <summary>Gathers the DM and N amounts harvested, to be removed, and to be returned.</summary>
        private void manageDefoliatedBiomass()
        {
            double digestibilityStructural = 0.65;
            double digestibilityNonStrucutural = 1.0;

            if (DefoliatedWt > 0.0)
            {
                HarvestedWt = 0.0;
                HarvestedN = 0.0;
                RemovedWt = 0.0;
                RemovedN = 0.0;

                foreach (Plant species in PMFSpecies)
                {
                    if(species.AboveGround.Wt > 0.0)
                    {
                        // get the amount harvested (plant stuff removed from plants)
                        speciesHarvestedWt = 0.0;
                        speciesHarvestedN = 0.0;
                        foreach (IOrgan organ in species.FindAllChildren<IOrgan>().OfType<IModel>().ToList())
                        {
                            speciesHarvestedWt += (double)myZone.Get(species.Name+"."+organ.Name+".Removed.Wt");
                            speciesHarvestedN += (double)myZone.Get(species.Name+"."+organ.Name+".Removed.N");
                        }

                        HarvestedWt += speciesHarvestedWt;
                        HarvestedN += speciesHarvestedN;

                        // get the DM fraction to be removed
                        if(FractionDMToRemove>=0.0)
                        {
                            speciesFractionToRemove = FractionDMToRemove;
                        }
                        else
                        { // use digestibility to define the fraction
                            double fracStructural = species.AboveGround.StructuralWt/species.AboveGround.Wt;
                            speciesFractionToRemove = (1.0 - fracStructural)*digestibilityNonStrucutural + fracStructural*digestibilityStructural;
                            speciesFractionToRemove = Math.Min(1.0, Math.Max(0.0, speciesFractionToRemove));
                        }

                        // get the amounts actually removed from field
                        RemovedWt += speciesHarvestedWt * speciesFractionToRemove;
                        RemovedN += speciesHarvestedN * FractionNToRemove;
                   }
                }

                foreach (AgPasture.PastureSpecies species in AgPSpecies)
                {
                    if(species.AboveGroundWt > 0.0)
                    {
                        // get the amount harvested
                        speciesHarvestedWt = species.HarvestedWt*0.1;
                        speciesHarvestedN = species.HarvestedN*0.1;
                        HarvestedWt += speciesHarvestedWt;
                        HarvestedN += speciesHarvestedN;

                        // get fraction to be removed
                        if(FractionDMToRemove>=0.0)
                        {
                            speciesFractionToRemove = FractionDMToRemove;
                        }
                        else
                        { // use digestibility to define the fraction
                            speciesFractionToRemove = species.HarvestedDigestibility;
                        }

                        // get the amounts actually removed from field
                        RemovedWt += speciesHarvestedWt * speciesFractionToRemove;
                        RemovedN += speciesHarvestedN * FractionNToRemove;
                    }
                }

                // get the amounts to be returned to the field (as residue or dung+urine)
                ReturnedWt = HarvestedWt - RemovedWt;
                ReturnedN = HarvestedN - RemovedN;
                if (ReturnType == ReturnAsTypes.AsDungUrine)
                {
                    if (NDungType == DungNContentTypes.DefineProportion)
                        NReturnedInDung = ReturnedN * ProportionN2Dung;
                    else
                        NReturnedInDung = Math.Min(ReturnedN, ReturnedWt * 0.4 / CNRatioDung);
                    NReturnedInDung = Math.Min(NReturnedInDung, ReturnedN);
                    NReturnedInUrine = ReturnedN - NReturnedInDung;
                }
                else
                {
                    NReturnedInDung = 0.0;
                    NReturnedInUrine = 0.0;
                }
            }
        }

        /// <summary>Returns the material not removed off field as residue.</summary>
        private void returnResidues()
        {
            if ((ReturnedWt > 0.0) || (ReturnedN > 0.0))
            {
                PMF.BiomassRemovedType BiomassResidue = new PMF.BiomassRemovedType();
                string[] type = new string[] { "Grass" };
                float[] dltdm = new float[] { (float)(10.0 * ReturnedWt) };
                float[] dltn = new float[] { (float)(10.0 * ReturnedN) };
                float[] dltp = new float[] { 0 };
                float[] fraction = new float[] { 1 };     // fraction is always 1.0 here

                BiomassResidue.crop_type = "Grass";
                BiomassResidue.dm_type = type;
                BiomassResidue.dlt_crop_dm = dltdm;
                BiomassResidue.dlt_dm_n = dltn;
                BiomassResidue.dlt_dm_p = dltp;
                BiomassResidue.fraction_to_residue = fraction;
                BiomassRemoved.Invoke(BiomassResidue);
            }
        }

        /// <summary>Returns the material not removed off field as dung and urine).</summary>
        private void returnExcreta()
        {
            if ((ReturnedWt > 0.0) || (NReturnedInDung > 0.0))
            {
                PMF.BiomassRemovedType BiomassDung = new PMF.BiomassRemovedType();
                string[] type = new string[] { "RuminantDung_PastureFed" };
                float[] dltdm = new float[] { (float)(10.0 * ReturnedWt) };
                float[] dltn = new float[] { (float)(10.0 * NReturnedInDung) };
                float[] dltp = new float[] { 0 };
                float[] fraction = new float[] { 1 };     // fraction is always 1.0 here

                BiomassDung.crop_type = "RuminantDung_PastureFed";
                BiomassDung.dm_type = type;
                BiomassDung.dlt_crop_dm = dltdm;
                BiomassDung.dlt_dm_n = dltn;
                BiomassDung.dlt_dm_p = dltp;
                BiomassDung.fraction_to_residue = fraction;
                BiomassRemoved.Invoke(BiomassDung);
            }

            if (NReturnedInUrine > 0.0)
            {
                double[] myUrineDeposition = new double[soilPhysical.Thickness.Length];
                for (int z = 0; z < urineFraction.Length; z++)
                    myUrineDeposition[z] = NReturnedInUrine * 10.0 * urineFraction[z];
                Urea.AddKgHaDelta(SoluteSetterType.Fertiliser, myUrineDeposition);
            }
        }

        // Auxiliary bits and pieces  - - - - - - - - - - - - - - - - - - - - - - - - - - - - - - - - -

        /// <summary>Type of defoliation to use</summary>
        public enum DefoliationTypes
        {
            /// <summary>Cut</summary>
            Cut,
            /// <summary>Graze</summary>
            Graze,
            /// <summary>Harvest</summary>
            Harvest
        }

        /// <summary>Flag how defoliations will be triggered</summary>
        public enum DefoliationTriggerTypes
        {
            /// <summary>Setting a fixed interval</summary>
            FixedInterval,
            /// <summary>Setting a target (minimum) inteval</summary>
            TargetInterval,
            /// <summary>Setting a target (maximum) standing biomass</summary>
            TargetStandingBiomass
        }

        /// <summary>How the DM amount given is interpreted</summary>
        public enum DefoliateAmountTypes
        {
            /// <summary>Setting a DM amount to remove</summary>
            DMToRemove,
            /// <summary>Setting the residual DM amount</summary>
            ResidualDM,
            /// <summary>Remove according to crop's BiomassRemovalFractions</summary>
            None_UseDefoliationFractions
        }

        /// <summary>Fraction of defoliated DM to remove from field</summary>
        public enum DMRemovalTypes
        {
            /// <summary>Remove all DM</summary>
            RemoveAll,
            /// <summary>Remove no DM</summary>
            RemoveNone,
            /// <summary>Remove a user-defined fraction</summary>
            UserDefinedFraction,
            /// <summary>Remove a fraction based on plant digestibility</summary>
            BasedOnDigestibility
        }

        /// <summary>Fraction of N in the defoliated material to remove from field</summary>
        public enum NRemovalTypes
        {
            /// <summary>Remove all N</summary>
            RemoveAll,
            /// <summary>Remove no N</summary>
            RemoveNone,
            /// <summary>Remove a user-defined fraction</summary>
            UserDefinedFraction,
            /// <summary>Remove a fraction equal to DM removed</summary>
            ProportionalToDM
        }

        /// <summary>Define how the non-removed material is returned to the field</summary>
        public enum ReturnAsTypes
        {
            /// <summary>Return plant material as residue</summary>
            AsResidue,
            /// <summary>Return meterial as dung and urine</summary>
            AsDungUrine
        }

        /// <summary>Define how the proportion of N in dung is defined</summary>
        public enum DungNContentTypes
        {
            /// <summary>Define the proportion of N returned as dung</summary>
            DefineProportion,
            /// <summary>Define the C:N of dung</summary>
            DefineCNratio
        }
    }
}
```
              Operations DefoliationSchedule
                2014-12-16  [DefoliationManager].Script.Defoliate(defoliationType: "Cut", amountDM: 100, amountType: "ResidualDM", duration: 1)
                2015-01-20  [DefoliationManager].Script.Defoliate(defoliationType: "Cut", amountDM: 100, amountType: "ResidualDM", duration: 1)
                2015-03-09  [DefoliationManager].Script.Defoliate(defoliationType: "Cut", amountDM: 100, amountType: "ResidualDM", duration: 1)
                2015-04-15  [DefoliationManager].Script.Defoliate(defoliationType: "Cut", amountDM: 100, amountType: "ResidualDM", duration: 1)
                2015-05-20  [DefoliationManager].Script.Defoliate(defoliationType: "Cut", amountDM: 100, amountType: "ResidualDM", duration: 1)
                2015-07-20  [DefoliationManager].Script.Defoliate(defoliationType: "Cut", amountDM: 100, amountType: "ResidualDM", duration: 1)
                2015-09-14  [DefoliationManager].Script.Defoliate(defoliationType: "Cut", amountDM: 100, amountType: "ResidualDM", duration: 1)
                2015-10-21  [DefoliationManager].Script.Defoliate(defoliationType: "Cut", amountDM: 100, amountType: "ResidualDM", duration: 1)
                2015-11-17  [DefoliationManager].Script.Defoliate(defoliationType: "Cut", amountDM: 100, amountType: "ResidualDM", duration: 1)
                2015-12-16  [DefoliationManager].Script.Defoliate(defoliationType: "Cut", amountDM: 100, amountType: "ResidualDM", duration: 1)
                2016-01-25  [DefoliationManager].Script.Defoliate(defoliationType: "Cut", amountDM: 100, amountType: "ResidualDM", duration: 1)
                2016-03-08  [DefoliationManager].Script.Defoliate(defoliationType: "Cut", amountDM: 100, amountType: "ResidualDM", duration: 1)
                2016-04-19  [DefoliationManager].Script.Defoliate(defoliationType: "Cut", amountDM: 100, amountType: "ResidualDM", duration: 1)
                2016-06-13  [DefoliationManager].Script.Defoliate(defoliationType: "Cut", amountDM: 100, amountType: "ResidualDM", duration: 1)
                2016-08-23  [DefoliationManager].Script.Defoliate(defoliationType: "Cut", amountDM: 100, amountType: "ResidualDM", duration: 1)
                2016-09-29  [DefoliationManager].Script.Defoliate(defoliationType: "Cut", amountDM: 100, amountType: "ResidualDM", duration: 1)
                2016-11-01  [DefoliationManager].Script.Defoliate(defoliationType: "Cut", amountDM: 100, amountType: "ResidualDM", duration: 1)
                2016-11-29  [DefoliationManager].Script.Defoliate(defoliationType: "Cut", amountDM: 100, amountType: "ResidualDM", duration: 1)
              Manager ExtraVariables
```csharp
// This will be replaced by the "ExtraVariables" section in "Replacements"

using Models.Soils;
using System;
using Models.Core;

namespace Models
{
    [Serializable] 
    public class Script : Model
    {
    }
}
```
            MicroClimate: a_interception=0; b_interception=1; c_interception=0; d_interception=0; SoilHeatFluxFraction=0.4; MinimumHeightDiffForNewLayer=0; NightInterceptionFraction=0.5; ReferenceHeight=2
            Irrigation
            Fertiliser
            SurfaceOrganicMatter: InitialResidueName=grass; InitialResidueType=grass; InitialResidueMass=500; InitialStandingFraction=0; InitialCPR=0; InitialCNR=40
            Soil: SoilType=Typic Udivitrand (US), Typic Orthic Allophanic Soil (NZ); LocalName=Horotiu Silt Loam; Site=Ruakura; NearestTown=Hamilton; Region=Waikato; Country=New Zealand; Latitude=0; Longitude=0
              DataSource=Based primarily on data from Close et al (2003), complemented with NZ NSD.
              Physical
                Thickness  ParticleSizeClay  BD     AirDry  LL15   DUL    SAT    KS
                200        20                0.88   0.07    0.22   0.421  0.587  507.8
                200        18.5              0.85   0.21    0.219  0.327  0.623  4445.1
                130        11                1.009  0.177   0.177  0.314  0.572  7262
                140        6.5               1.055  0.139   0.139  0.291  0.536  11928
                380        5.1               1.055  0.125   0.125  0.182  0.504  25031
                230        3.8               0.839  0.102   0.102  0.123  0.439  28410.4
                220        2.4               0.695  0.083   0.083  0.101  0.363  42658.3
                SoilCrop ChicorySoil: LL=[0.22, 0.219, 0.177, 0.139, 0.125, 0.102, 0.083]; KL=[0.07, 0.058, 0.038, 0.025, 0.01, 0.004, 0.002]; XF=[1, 1, 1, 1, 1, 1, 1]
                SoilCrop PlantainForageSoil: LL=[0.22, 0.219, 0.177, 0.139, 0.125, 0.102, 0.083]; KL=[0.08, 0.07, 0.05, 0.03, 0.01, 0.003, 0]; XF=[1, 1, 1, 1, 1, 1, 1]
                SoilCrop AGPRyegrassSoil: LL=[0.22, 0.219, 0.177, 0.139, 0.125, 0.102, 0.083]; KL=[0.1, 0.085, 0.055, 0.02, 0.005, 0, 0]; XF=[1, 1, 1, 1, 1, 1, 1]
                SoilCrop AGPWhiteCloverSoil: LL=[0.22, 0.219, 0.177, 0.139, 0.125, 0.102, 0.083]; KL=[0.085, 0.05, 0, 0, 0, 0, 0]; XF=[1, 1, 1, 1, 1, 1, 1]
                SoilCrop WhiteCloverSoil: LL=[0.22, 0.219, 0.177, 0.139, 0.125, 0.102, 0.083]; KL=[0.085, 0.077, 0.04, 0.01, 0.001, 0, 0]; XF=[1, 1, 1, 1, 1, 1, 1]
                SoilCrop AGPLucerneSoil: LL=[0.22, 0.219, 0.177, 0.139, 0.125, 0.102, 0.083]; KL=[0.06, 0.05, 0.035, 0.025, 0.015, 0.01, 0.01]; XF=[1, 1, 1, 1, 1, 1, 1]
                SoilCrop LucerneSoil: LL=[0.22, 0.219, 0.177, 0.139, 0.125, 0.102, 0.083]; KL=[0.06, 0.05, 0.035, 0.025, 0.015, 0.01, 0.01]; XF=[1, 1, 1, 1, 1, 1, 1]
              WaterBalance SoilWater: SummerDate=1-Oct; SummerU=9; SummerCona=4; WinterDate=1-Apr; WinterU=6; WinterCona=3; DiffusConst=88; DiffusSlope=35; Salb=0.15; CN2Bare=70; CNRed=20; CNCov=0.8; DischargeWidth=0; CatchmentArea=0; PSIDul=-100; Thickness=[200, 200, 130, 140, 380, 230, 220]; SWCON=[0.48, 0.59, 0.61, 0.6, 0.63, 0.7, 0.71]
              Organic: FOMCNRatio=40; CarbonUnits=Total
                Thickness  Carbon  SoilCNRatio  FBiom  FInert  FOM
                200        8       12.5         0.075  0.7     338.974
                200        1.88    12.5         0.013  0.79    227.221
                130        0.93    12.5         0.009  0.9     175.199
                140        0.43    12.5         0.008  0.94    132.413
                380        0.13    12.5         0.007  0.96    61.9249
                230        0.1     12.5         0.005  0.99    39.0922
                220        0.07    12.5         0.005  0.995   25.1768
              Chemical: Thickness=[200, 200, 130, 140, 380, 230, 220]; PH=[6, 6, 6, 6, 6, 6, 6]; PHUnits=Water
              SoilNitrogen: fom_types=[default, manure, mucuna, lablab, shemp, stable]; fract_carb=[0.2, 0.3, 0.54, 0.57, 0.45, 0]; fract_cell=[0.7, 0.3, 0.37, 0.37, 0.47, 0.1]; fract_lign=[0.1, 0.4, 0.09, 0.06, 0.08, 0.9]; NPartitionApproach=0
              CERESSoilTemperature Temperature
              Water: Thickness=[200, 200, 130, 140, 380, 230, 220]; InitialValues=[0.4009, 0.3162, 0.3003, 0.2758, 0.1763, 0.1209, 0.0992]; InitialPAWmm=118.206; RelativeTo=LL15; FilledFromTop=false
              SoilNitrogenNO3 NO3: Thickness=[200, 200, 130, 140, 380, 230, 220]; InitialValuesUnits=ppm; WaterTableConcentration=0; D0=0; DepthConstant=0; MaxDepthSoluteAccessible=0; RunoffEffectivenessAtMovingSolute=0; MaxEffectiveRunoff=0
                InitialValues=[8.52273, 4.11765, 0.797423, 0.797423, 0.798126, 0.80277, 0.80277]
              SoilNitrogenNH4 NH4: Thickness=[200, 200, 130, 140, 380, 230, 220]; InitialValuesUnits=ppm; WaterTableConcentration=0; D0=0; DepthConstant=0; MaxDepthSoluteAccessible=0; RunoffEffectivenessAtMovingSolute=0; MaxEffectiveRunoff=0
                InitialValues=[0.5, 0.2, 0.097239, 0.097239, 0.100377, 0.121085, 0.121085]
              SoilNitrogenUrea Urea: Thickness=[200, 200, 130, 140, 380, 230, 220]; InitialValues=[0, 0, 0, 0, 0, 0, 0]; InitialValuesUnits=kg/ha; WaterTableConcentration=0; D0=0; DepthConstant=0; MaxDepthSoluteAccessible=0; RunoffEffectivenessAtMovingSolute=0; MaxEffectiveRunoff=0
            PastureSpecies AGPRyegrass: doyGermination=275; daysEmergenceToAnthesis=120; daysAnthesisToMaturity=85; degreesDayForAnthesis=1100; degreesDayForMaturity=900; daysAnnualsFactor=45; InitialShootDM=1100; InitialRootDM=450; InitialRootDepth=1000; initialDMFractionsGrasses=[0.15, 0.25, 0.25, 0.05, 0.05, 0.1, 0.1, 0.05, 0, 0, 0]; initialDMFractionsForbs=[0.2, 0.2, 0.15, 0.05, 0.1, 0.15, 0.1, 0.05, 0, 0, 0]; PhotosyntheticEfficiency=0.01; PhotosynthesisCurveFactor=0.8; FractionPAR=0.5; ReferenceCO2=380; CO2EffectScaleFactor=700; CO2EffectOffsetFactor=600; CO2EffectMinimum=0.7; CO2EffectExponent=2; ReproSeasonDurationCoeff=2; ReproSeasonShouldersLengthFactor=1; ReproSeasonOnsetDurationFactor=0.6; RelativeTurnoverEmerging=2; DetachmentDroughtCoefficient=3; DetachmentDroughtEffectMin=0.1; TurnoverStockFactor=0.01; TurnoverDefoliationEffectMin=0.025; MinimumGreenLeafProp=0.8; MinimumGreenRootProp=0.5
              initialDMFractionsLegumes=[0.16, 0.23, 0.22, 0.05, 0.03, 0.05, 0.05, 0.01, 0.04, 0.08, 0.08]
              LinearInterpolationFunction FVPDFunction
            PastureSpecies AGPWhiteClover: doyGermination=275; daysEmergenceToAnthesis=120; daysAnthesisToMaturity=85; degreesDayForAnthesis=1100; degreesDayForMaturity=900; daysAnnualsFactor=45; InitialShootDM=500; InitialRootDM=150; InitialRootDepth=350; initialDMFractionsGrasses=[0.15, 0.25, 0.25, 0.05, 0.05, 0.1, 0.1, 0.05, 0, 0, 0]; initialDMFractionsForbs=[0.2, 0.2, 0.15, 0.05, 0.1, 0.15, 0.1, 0.05, 0, 0, 0]; PhotosyntheticEfficiency=0.01; PhotosynthesisCurveFactor=0.8; FractionPAR=0.5; ReferenceCO2=380; CO2EffectScaleFactor=700; CO2EffectOffsetFactor=600; CO2EffectMinimum=0.7; CO2EffectExponent=2; ReproSeasonDurationCoeff=2; ReproSeasonShouldersLengthFactor=1; ReproSeasonOnsetDurationFactor=0.6; RelativeTurnoverEmerging=2; DetachmentDroughtCoefficient=3; DetachmentDroughtEffectMin=0.1; TurnoverStockFactor=0.01; TurnoverDefoliationEffectMin=0.025; MinimumGreenLeafProp=0.8; MinimumGreenRootProp=0.5
              initialDMFractionsLegumes=[0.16, 0.23, 0.22, 0.05, 0.03, 0.05, 0.05, 0.01, 0.04, 0.08, 0.08]
              LinearInterpolationFunction FVPDFunction
            Report: EventNames=[Clock].DoReport
              VariableNames:
                [Clock].Today as Date
                [Clock].Today.DayOfYear as DayOfYear
                [Weather].Radn as SolarRadiation
                ([AGPWhiteClover].InterceptedRadn+[AGPRyegrass].InterceptedRadn) as InterceptedRadiation
                [AGPRyegrass].InterceptedRadn as Ryegrass.RadiationIntercepted
                [AGPWhiteClover].InterceptedRadn as WhiteClover.RadiationIntercepted
                [Weather].Rain as Rainfall
                [Irrigation].IrrigationApplied as IrrigationApplied
                [MicroClimate].PrecipitationInterception as PrecipitationInterception
                [MicroClimate].PetTotal
                [Soil].SoilWater.Eo as Eo
                [Soil].SoilWater.Es as Evaporation
                (sum([AGPWhiteClover].WaterUptake)+sum([AGPRyegrass].WaterUptake))) as Transpiration
                [Soil].SoilWater.pond as PondedWater
                [Soil].SoilWater.Drainage as Drainage
                [Soil].SoilWater.Runoff as Runoff
                sum([Soil].SoilWater.LateralOutflow) as LateralFlow
                sum([Soil].Water.MM) as TotalSWC
                sum([Soil].Physical.DULmm) as TotalDUL
                sum([Soil].Physical.LL15mm) as TotalLL15
                [Soil].Water.Volumetric[1] as SWCTopLayer
                [Soil].Physical.DUL[1] as DULTopLayer
                [Fertiliser].NitrogenApplied as FertiliserN
                sum([Soil].SoilNitrogen.Denitrification) as DenitrifiedN
                ([Soil].SoilWater.LeachNH4 + [Soil].SoilWater.LeachNO3) as LeachedN
                ([AGPWhiteClover].SoilUptakeN+[AGPRyegrass].SoilUptakeN) as UptakeN
                sum([Soil].SoilNitrogen.MineralisedN) as MineralisedSoilN
                sum([Soil].SoilNitrogen.dlt_n_min_res) as MineralisedSurfOMN
                ([AGPWhiteClover].LitterDepositionN*0.1+[AGPRyegrass].LitterDepositionN*0.1) as DetachedAGN
                ([AGPWhiteClover].RootDetachedN*0.1+[AGPRyegrass].RootDetachedN*0.1) as DetachedBGN
                ([AGPWhiteClover].LitterDepositionN+[AGPWhiteClover].RootDetachedN+[AGPRyegrass].LitterDepositionN+[AGPRyegrass].RootDetachedN) as DetachedTotalN
                [AGPWhiteClover].FixedN as FixedN
                (sum([Soil].Urea.kgha) + sum([Soil].NH4.kgha) + sum([Soil].NO3.kgha)) as SoilNContent
                sum([Soil].Urea.kgha) as SoilUrea
                sum([Soil].NH4.kgha) as SoilNH4
                sum([Soil].NO3.kgha) as SoilNO3
                (sum([Soil].NH4.kgha[1:4])+sum([Soil].NO3.kgha[1:4])) as TopSoilN
                [SurfaceOrganicMatter].N as TotalSurfOMN
                sum([Soil].SoilNitrogen.FOMN) as TotalFOMN
                sum([Soil].SoilNitrogen.HumicN) as TotalHumicN
                sum([Soil].SoilNitrogen.MicrobialN as TotalMicrobialN
                [DefoliationManager].Script.RotationHarvestedDM as RotationHarvestedWt
                [DefoliationManager].Script.PreHarvestDM
                [DefoliationManager].Script.PostHarvestDM
                [DefoliationManager].Script.DefoliatedN as NTakenOff
                [DefoliationManager].Script.HarvestedN
                (10*[DefoliationManager].Script.RemovedN) as Defoliate.Script.RemovedN
                [DefoliationManager].Script.DefoliatedWt as HarvestedWt
                ([DefoliationManager].Script.RemovedN/([DefoliationManager].Script.RemovedWt+0.000001) as RemovedNConc
                [ExtraVariables].Script.AccumHarvestedWt as CumulativeHarvestedWt
                [ExtraVariables].Script.AccumHarvestedN as CumulativeNTakenOff
                ([AGPWhiteClover].HarvestedWt/([AGPRyegrass].HarvestedWt + [AGPWhiteClover].HarvestedWt + 0.000001)) as WhiteClover.HarvestedFraction
                ([AGPRyegrass].HarvestedWt/([AGPRyegrass].HarvestedWt + [AGPWhiteClover].HarvestedWt + 0.000001)) as Ryegrass.HarvestedFraction
                ([AGPWhiteClover].TotalWt+[AGPRyegrass].TotalWt)*0.1 as TotalPlantWt
                ([AGPWhiteClover].AboveGroundLiveWt+[AGPRyegrass].AboveGroundLiveWt+[AGPWhiteClover].BelowGroundWt+[AGPRyegrass].BelowGroundWt)*0.1 as TotalPlantLiveWt
                ([AGPWhiteClover].AboveGroundWt+[AGPRyegrass].AboveGroundWt)*0.1 as AboveGroundWt
                ([AGPWhiteClover].BelowGroundWt+[AGPRyegrass].BelowGroundWt)*0.1 as BelowGroundWt
                ([AGPWhiteClover].TotalN+[AGPRyegrass].TotalN)*0.1 as TotalPlantN
                ([AGPWhiteClover].AboveGroundN+[AGPRyegrass].AboveGroundN)*0.1 as AboveGroundN
                ([AGPWhiteClover].BelowGroundN+[AGPRyegrass].BelowGroundN)*0.1 as BelowGroundN
                (([AGPWhiteClover].AboveGroundN+[AGPRyegrass].AboveGroundN)/([AGPWhiteClover].AboveGroundWt+[AGPRyegrass].AboveGroundWt+0.000001)) as AboveGroundNConc
                (([AGPWhiteClover].BelowGroundN+[AGPRyegrass].BelowGroundN)/([AGPWhiteClover].BelowGroundWt+[AGPRyegrass].BelowGroundWt+0.000001)) as BelowGroundNConc
                ([AGPWhiteClover].AboveGroundLiveWt+[AGPRyegrass].AboveGroundLiveWt)*0.1 as AboveGroundLiveWt
                ([AGPWhiteClover].AboveGroundLiveN+[AGPRyegrass].AboveGroundLiveN)*0.1 as AboveGroundDeadWt
                ([AGPWhiteClover].BelowGroundWt+[AGPRyegrass].BelowGroundWt)*0.1 as BelowGroundLiveWt
                (([AGPWhiteClover].AboveGroundLiveN+[AGPRyegrass].AboveGroundLiveN)/([AGPWhiteClover].AboveGroundLiveWt+[AGPRyegrass].AboveGroundLiveWt+0.000001)) as AboveGroundLiveNc
                [ExtraVariables].Script.HerbageNConc as HerbageNConc
                ([AGPRyegrass].TotalWt*0.1) as Ryegrass.Total.Wt
                ([AGPRyegrass].AboveGroundLiveWt*0.1+[AGPRyegrass].BelowGroundWt*0.1) as Ryegrass.TotalLive.Wt
                ([AGPRyegrass].AboveGroundWt*0.1) as Ryegrass.AboveGround.Wt
                ([AGPRyegrass].BelowGroundWt*0.1) as Ryegrass.BelowGround.Wt
                ([AGPRyegrass].AboveGroundLiveWt*0.1) as Ryegrass.AboveGroundLive.Wt
                ([AGPRyegrass].AboveGroundDeadWt*0.1) as Ryegrass.AboveGroundDead.Wt
                ([AGPRyegrass].BelowGroundWt*0.1) as Ryegrass.BelowGroundLive.Wt
                ([AGPRyegrass].TotalN*0.1) as Ryegrass.Total.N
                ([AGPRyegrass].AboveGroundN*0.1) as Ryegrass.AboveGround.N
                ([AGPRyegrass].BelowGroundN*0.1) as Ryegrass.BelowGround.N
                [AGPRyegrass].AboveGroundNConc as Ryegrass.AboveGround.NConc
                ([AGPRyegrass].BelowGroundN/([AGPRyegrass].BelowGroundWt+0.000001)) as Ryegrass.BelowGround.NConc
                ([AGPRyegrass].AboveGroundLiveN/([AGPRyegrass].AboveGroundLiveWt+0.000001)) as Ryegrass.AboveGroundLive.NConc
                ([AGPWhiteClover].TotalWt*0.1) as WhiteClover.Total.Wt
                ([AGPWhiteClover].AboveGroundLiveWt*0.1+[AGPWhiteClover].BelowGroundWt*0.1) as WhiteClover.TotalLive.Wt
                ([AGPWhiteClover].AboveGroundWt*0.1) as WhiteClover.AboveGround.Wt
                ([AGPWhiteClover].BelowGroundWt*0.1) as WhiteClover.BelowGround.Wt
                ([AGPWhiteClover].AboveGroundLiveWt*0.1) as WhiteClover.AboveGroundLive.Wt
                ([AGPWhiteClover].AboveGroundDeadWt*0.1) as WhiteClover.AboveGroundDead.Wt
                ([AGPWhiteClover].BelowGroundWt*0.1) as WhiteClover.BelowGroundLive.Wt
                ([AGPWhiteClover].TotalN*0.1) as WhiteClover.Total.N
                ([AGPWhiteClover].AboveGroundN*0.1) as WhiteClover.AboveGround.N
                ([AGPWhiteClover].BelowGroundN*0.1) as WhiteClover.BelowGround.N
                [AGPWhiteClover].AboveGroundNConc as WhiteClover.AboveGround.NConc
                ([AGPWhiteClover].BelowGroundN/([AGPWhiteClover].BelowGroundWt+0.000001)) as WhiteClover.BelowGround.NConc
                ([AGPWhiteClover].AboveGroundLiveN/([AGPWhiteClover].AboveGroundLiveWt+0.000001)) as WhiteClover.AboveGroundLive.NConc
                ([AGPWhiteClover].CoverTotal+[AGPRyegrass].CoverTotal) as CoverTotal
                ([AGPWhiteClover].CoverDead+[AGPRyegrass].CoverDead) as CoverDead
                [MicroClimate].CanopyCover
                ([AGPWhiteClover].LAIGreen+[AGPRyegrass].LAIGreen) as LAIgreen
                ([AGPWhiteClover].LAIDead+[AGPRyegrass].LAIDead) as LAIdead
                (([AGPWhiteClover].Height+[AGPRyegrass].Height)/2) as AverageShootHeight
                (([AGPWhiteClover].RootDepth+[AGPRyegrass].RootDepth)/2) as AverageRootDepth
                ([AGPWhiteClover].Root.LengthDensity+[AGPRyegrass].Root.LengthDensity) as Total.RootLengthDensity
                ([AGPWhiteClover].AboveGroundWt/([AGPWhiteClover].AboveGroundWt+[AGPRyegrass].AboveGroundWt+0.000001)) as WhiteClover.BiomassFraction
                ([AGPRyegrass].AboveGroundWt/([AGPWhiteClover].AboveGroundWt+[AGPRyegrass].AboveGroundWt+0.000001)) as Ryegrass.BiomassFraction
                ([AGPWhiteClover].AboveGroundLiveWt/([AGPWhiteClover].BelowGroundWt+0.000001)) as WhiteClover.ShootRootRatio
                ([AGPWhiteClover].AboveGroundLiveWt/([AGPWhiteClover].AboveGroundLiveWt+[AGPWhiteClover].BelowGroundWt+0.000001)) as WhiteClover.CurrentAboveGroundFraction
                ([AGPRyegrass].AboveGroundLiveWt/([AGPRyegrass].BelowGroundWt+0.000001)) as Ryegrass.ShootRootRatio
                ([AGPRyegrass].AboveGroundLiveWt/([AGPRyegrass].AboveGroundLiveWt+[AGPRyegrass].BelowGroundWt+0.000001)) as Ryegrass.CurrentAboveGroundFraction
                [AGPRyegrass].CoverTotal as Ryegrass.CoverTotal
                [AGPWhiteClover].CoverTotal as WhiteClover.CoverTotal
                [AGPRyegrass].Height as Ryegrass.Height
                [AGPWhiteClover].Height as WhiteClover.Height
                [AGPRyegrass].LAI as Ryegrass.LAI
                [AGPWhiteClover].LAI as WhiteClover.LAI
                [AGPRyegrass].RootDepth as Ryegrass.Root.Depth
                [AGPWhiteClover].RootDepth as WhiteClover.Root.Depth
                [AGPRyegrass].GlfNSupply
                [AGPRyegrass].GlfWaterSupply
                [AGPRyegrass].GlfWaterLogging
                [AGPRyegrass].GlfNContent
                [AGPRyegrass].GlfCO2
                [AGPRyegrass].GlfTemperature
                [AGPRyegrass].GlfColdDamage
                [AGPRyegrass].GlfHeatDamage
                [AGPWhiteClover].GlfNSupply
                [AGPWhiteClover].GlfWaterSupply
                [AGPWhiteClover].GlfWaterLogging
                [AGPWhiteClover].GlfNContent
                [AGPWhiteClover].GlfCO2
                [AGPWhiteClover].GlfTemperature
                [AGPWhiteClover].GlfColdDamage
                [AGPWhiteClover].GlfHeatDamage
      Experiment FRNLRuakuraMix2
        DisabledSimNames=[FRNLRuakuraNRate50, FRNLRuakuraNRate100, FRNLRuakuraNRate200, FRNLRuakuraNRate350]
        Memo
          ###FRNL Ruakura###

          This simulation setup was based on field trials performed at DairyNZ's Scott Farm, in Ruakura, New Zealand, between 2014 and 2016.  The experiment was part of the FRNL (Forages for Reduced Nitrogen Leaching) program and the data is basically unpublished (references will be added when they come about).  Here only plots with mixed pasture species are used.  The species included were ryegrass, white clover, lucerne, chicory, and plantain (weeds also occured, but are not included in the simulation - the fraction of biomass was fairly small).
          The experiment consisted of six fertiliser treatments (nominally at N rates of 0, 50, 100, 200, 350 and 500 kg/ha/yr) in three replicates; actual amounts varied as fertiliser applications followed pasture harvests.  Measurements comprised yield, for each species, and quality indicators (here N content is used), for whole sward.
          Observed data supplied by Grant Edwards, Lincoln University.

          The soil at the experimental site was a Horotiu silt loam (an Orthic Allophanic soil; USDA: Typic Udivitrand), the parameters required were inferred using data from the New Zealand National Soils Database (Landcare Research).
          Weather data was obtained from nearby Ruakura weather station (NIWA).
          Simulation of ryegrass and lucerne are done using the AgPasture model as the PMF versions are still under development.
        Factors
          Factor NRate: Specification=[NRate]
            Operations 0
            Operations 50
              2014-12-22  [Fertiliser].Apply(Amount: 5, Type: Fertiliser.Types.UreaN, Depth: 10)
              2015-01-19  [Fertiliser].Apply(Amount: 5, Type: Fertiliser.Types.UreaN, Depth: 10)
              2015-03-03  [Fertiliser].Apply(Amount: 5, Type: Fertiliser.Types.UreaN, Depth: 10)
              2015-04-21  [Fertiliser].Apply(Amount: 5, Type: Fertiliser.Types.UreaN, Depth: 10)
              2015-06-10  [Fertiliser].Apply(Amount: 5, Type: Fertiliser.Types.UreaN, Depth: 10)
              2015-09-09  [Fertiliser].Apply(Amount: 5, Type: Fertiliser.Types.UreaN, Depth: 10)
              2015-10-19  [Fertiliser].Apply(Amount: 5, Type: Fertiliser.Types.UreaN, Depth: 10)
              2015-11-19  [Fertiliser].Apply(Amount: 5, Type: Fertiliser.Types.UreaN, Depth: 10)
              2015-12-22  [Fertiliser].Apply(Amount: 5, Type: Fertiliser.Types.UreaN, Depth: 10)
              2016-02-03  [Fertiliser].Apply(Amount: 5, Type: Fertiliser.Types.UreaN, Depth: 10)
              2016-05-06  [Fertiliser].Apply(Amount: 5, Type: Fertiliser.Types.UreaN, Depth: 10)
              2016-07-12  [Fertiliser].Apply(Amount: 5, Type: Fertiliser.Types.UreaN, Depth: 10)
              2016-09-14  [Fertiliser].Apply(Amount: 5, Type: Fertiliser.Types.UreaN, Depth: 10)
            Operations 100
              2014-12-22  [Fertiliser].Apply(Amount: 10, Type: Fertiliser.Types.UreaN, Depth: 10)
              2015-01-19  [Fertiliser].Apply(Amount: 10, Type: Fertiliser.Types.UreaN, Depth: 10)
              2015-03-03  [Fertiliser].Apply(Amount: 10, Type: Fertiliser.Types.UreaN, Depth: 10)
              2015-04-21  [Fertiliser].Apply(Amount: 10, Type: Fertiliser.Types.UreaN, Depth: 10)
              2015-06-10  [Fertiliser].Apply(Amount: 10, Type: Fertiliser.Types.UreaN, Depth: 10)
              2015-09-09  [Fertiliser].Apply(Amount: 10, Type: Fertiliser.Types.UreaN, Depth: 10)
              2015-10-19  [Fertiliser].Apply(Amount: 10, Type: Fertiliser.Types.UreaN, Depth: 10)
              2015-11-19  [Fertiliser].Apply(Amount: 10, Type: Fertiliser.Types.UreaN, Depth: 10)
              2015-12-22  [Fertiliser].Apply(Amount: 10, Type: Fertiliser.Types.UreaN, Depth: 10)
              2016-02-03  [Fertiliser].Apply(Amount: 10, Type: Fertiliser.Types.UreaN, Depth: 10)
              2016-05-06  [Fertiliser].Apply(Amount: 10, Type: Fertiliser.Types.UreaN, Depth: 10)
              2016-07-12  [Fertiliser].Apply(Amount: 10, Type: Fertiliser.Types.UreaN, Depth: 10)
              2016-09-14  [Fertiliser].Apply(Amount: 10, Type: Fertiliser.Types.UreaN, Depth: 10)
            Operations 200
              2014-12-22  [Fertiliser].Apply(Amount: 20, Type: Fertiliser.Types.UreaN, Depth: 10)
              2015-01-19  [Fertiliser].Apply(Amount: 20, Type: Fertiliser.Types.UreaN, Depth: 10)
              2015-03-03  [Fertiliser].Apply(Amount: 20, Type: Fertiliser.Types.UreaN, Depth: 10)
              2015-04-21  [Fertiliser].Apply(Amount: 20, Type: Fertiliser.Types.UreaN, Depth: 10)
              2015-06-10  [Fertiliser].Apply(Amount: 20, Type: Fertiliser.Types.UreaN, Depth: 10)
              2015-09-09  [Fertiliser].Apply(Amount: 20, Type: Fertiliser.Types.UreaN, Depth: 10)
              2015-10-19  [Fertiliser].Apply(Amount: 20, Type: Fertiliser.Types.UreaN, Depth: 10)
              2015-11-19  [Fertiliser].Apply(Amount: 20, Type: Fertiliser.Types.UreaN, Depth: 10)
              2015-12-22  [Fertiliser].Apply(Amount: 20, Type: Fertiliser.Types.UreaN, Depth: 10)
              2016-02-03  [Fertiliser].Apply(Amount: 20, Type: Fertiliser.Types.UreaN, Depth: 10)
              2016-05-06  [Fertiliser].Apply(Amount: 20, Type: Fertiliser.Types.UreaN, Depth: 10)
              2016-07-12  [Fertiliser].Apply(Amount: 20, Type: Fertiliser.Types.UreaN, Depth: 10)
              2016-09-14  [Fertiliser].Apply(Amount: 20, Type: Fertiliser.Types.UreaN, Depth: 10)
            Operations 350
              2014-12-22  [Fertiliser].Apply(Amount: 35, Type: Fertiliser.Types.UreaN, Depth: 10)
              2015-01-19  [Fertiliser].Apply(Amount: 35, Type: Fertiliser.Types.UreaN, Depth: 10)
              2015-03-03  [Fertiliser].Apply(Amount: 35, Type: Fertiliser.Types.UreaN, Depth: 10)
              2015-04-21  [Fertiliser].Apply(Amount: 35, Type: Fertiliser.Types.UreaN, Depth: 10)
              2015-06-10  [Fertiliser].Apply(Amount: 35, Type: Fertiliser.Types.UreaN, Depth: 10)
              2015-09-09  [Fertiliser].Apply(Amount: 35, Type: Fertiliser.Types.UreaN, Depth: 10)
              2015-10-19  [Fertiliser].Apply(Amount: 35, Type: Fertiliser.Types.UreaN, Depth: 10)
              2015-11-19  [Fertiliser].Apply(Amount: 35, Type: Fertiliser.Types.UreaN, Depth: 10)
              2015-12-22  [Fertiliser].Apply(Amount: 35, Type: Fertiliser.Types.UreaN, Depth: 10)
              2016-02-03  [Fertiliser].Apply(Amount: 35, Type: Fertiliser.Types.UreaN, Depth: 10)
              2016-05-06  [Fertiliser].Apply(Amount: 35, Type: Fertiliser.Types.UreaN, Depth: 10)
              2016-07-12  [Fertiliser].Apply(Amount: 35, Type: Fertiliser.Types.UreaN, Depth: 10)
              2016-09-14  [Fertiliser].Apply(Amount: 35, Type: Fertiliser.Types.UreaN, Depth: 10)
            Operations 500
              2014-12-22  [Fertiliser].Apply(Amount: 50, Type: Fertiliser.Types.UreaN, Depth: 10)
              2015-01-19  [Fertiliser].Apply(Amount: 50, Type: Fertiliser.Types.UreaN, Depth: 10)
              2015-03-03  [Fertiliser].Apply(Amount: 50, Type: Fertiliser.Types.UreaN, Depth: 10)
              2015-04-21  [Fertiliser].Apply(Amount: 50, Type: Fertiliser.Types.UreaN, Depth: 10)
              2015-06-10  [Fertiliser].Apply(Amount: 50, Type: Fertiliser.Types.UreaN, Depth: 10)
              2015-09-09  [Fertiliser].Apply(Amount: 50, Type: Fertiliser.Types.UreaN, Depth: 10)
              2015-10-19  [Fertiliser].Apply(Amount: 50, Type: Fertiliser.Types.UreaN, Depth: 10)
              2015-11-19  [Fertiliser].Apply(Amount: 50, Type: Fertiliser.Types.UreaN, Depth: 10)
              2015-12-22  [Fertiliser].Apply(Amount: 50, Type: Fertiliser.Types.UreaN, Depth: 10)
              2016-02-03  [Fertiliser].Apply(Amount: 50, Type: Fertiliser.Types.UreaN, Depth: 10)
              2016-05-06  [Fertiliser].Apply(Amount: 50, Type: Fertiliser.Types.UreaN, Depth: 10)
              2016-07-12  [Fertiliser].Apply(Amount: 50, Type: Fertiliser.Types.UreaN, Depth: 10)
              2016-09-14  [Fertiliser].Apply(Amount: 50, Type: Fertiliser.Types.UreaN, Depth: 10)
        Simulation FRNLRuakuraMix2
          Clock: Start=2014-09-01; End=2016-12-31
          Weather: FileName=Ruakura.met
          Summary summaryfile
          SoilArbitrator Soil Arbitrator
          Forages
            Parameters:
              Name                          IsLive  DigestibilityString  FractionConsumable  MinimumAmount  UseDigestibilityFromModel
              SurfaceOrganicMatter.Residue  true    0.7                  1                   100            false
              SurfaceOrganicMatter.Residue  false   0.3                  1                   0              false
              Chicory.Leaf                  true    0.7                  1                   100            false
              Chicory.Leaf                  false   0.3                  1                   0              false
              Chicory.Stem                  true    0.7                  1                   100            false
              Chicory.Stem                  false   0.3                  1                   0              false
              Chicory.Inflorescence         true    0.7                  1                   100            false
              Chicory.Inflorescence         false   0.3                  1                   0              false
              Chicory.Taproot               true    0.7                  1                   100            false
              Chicory.Taproot               false   0.3                  1                   0              false
              Chicory.Root                  true    0                    0                   0              false
              Chicory.Root                  false   0                    0                   0              false
              PlantainForage.Leaf           true    0.7                  1                   100            false
              PlantainForage.Leaf           false   0.3                  1                   0              false
              PlantainForage.Stem           true    0.7                  1                   100            false
              PlantainForage.Stem           false   0.3                  1                   0              false
              PlantainForage.Inflorescence  true    0.7                  1                   100            false
              PlantainForage.Inflorescence  false   0.3                  1                   0              false
              PlantainForage.Taproot        true    0.7                  1                   100            false
              PlantainForage.Taproot        false   0.3                  1                   0              false
              PlantainForage.Root           true    0                    0                   0              false
              PlantainForage.Root           false   0                    0                   0              false
              AGPRyegrass.Leaf              true    0.7                  1                   100            false
              AGPRyegrass.Leaf              false   0.3                  1                   0              false
              AGPRyegrass.Stem              true    0.7                  1                   100            false
              AGPRyegrass.Stem              false   0.3                  1                   0              false
              AGPRyegrass.Stolon            true    0.7                  1                   100            false
              AGPRyegrass.Stolon            false   0.3                  1                   0              false
              AGPLucerne.Leaf               true    0.7                  1                   100            false
              AGPLucerne.Leaf               false   0.3                  1                   0              false
              AGPLucerne.Stem               true    0.7                  1                   100            false
              AGPLucerne.Stem               false   0.3                  1                   0              false
              AGPLucerne.Stolon             true    0.7                  1                   100            false
              AGPLucerne.Stolon             false   0.3                  1                   0              false
              AGPWhiteClover.Leaf           true    0.7                  1                   100            false
              AGPWhiteClover.Leaf           false   0.3                  1                   0              false
              AGPWhiteClover.Stem           true    0.7                  1                   100            false
              AGPWhiteClover.Stem           false   0.3                  1                   0              false
              AGPWhiteClover.Stolon         true    0.7                  1                   100            false
              AGPWhiteClover.Stolon         false   0.3                  1                   0              false
          Zone Field: Area=1; Slope=0; AspectAngle=0; Altitude=50
            Folder Management
              Operations Sowing
                2014-10-24  [Chicory].Sow(population: 100, cultivar: "Choice", depth: 10, rowSpacing: 150)
                2014-10-24  [PlantainForage].Sow(population: 100, cultivar: "Tonic", depth: 10, rowSpacing: 150)
                2014-09-01  [AGPWhiteClover].EndCrop()
                2014-11-15  [AGPWhiteClover].Sow(population: 0, cultivar: "W", depth: 0, rowSpacing: 0)
                2014-09-01  [AGPRyegrass].EndCrop()
                2014-11-15  [AGPRyegrass].Sow(population: 0, cultivar: "R", depth: 0, rowSpacing: 0)
                2014-09-01  [AGPLucerne].EndCrop()
                2014-11-05  [AGPLucerne].Sow(population: 0, cultivar: "L", depth: 0, rowSpacing: 0)
              Operations NRate
              Operations BaseFertiliser: same as Evaluation.NewZealand.FRNLRuakuraMix1.FRNLRuakuraMix1.Field.Management.BaseFertiliser
              Manager DefoliationManager
                AutomaticManagementIsEnabled = False
                DefoliationRotationStartDate = 11/01/2014 00:00:00
                DefoliationRotationEndDate = 12/31/2100 00:00:00
                DefoliateType = Cut
                DefoliationTriggerType = TargetStandingBiomass
                IntervalBetweenDefoliations = 21
                TargetStandingBiomass = 200
                DurationOfEachDefoliation = 1
                RemoveAmountType = ResidualDM
                AmountForEachDefoliation = 150
                RemoveAllBiomassIsEnabled = False
                DMRemoveType = UserDefinedFraction
                FractionDMToRemove = 1
                NRemoveType = UserDefinedFraction
                FractionNToRemove = 1
                ReturnType = AsResidue
                NDungType = DefineCNratio
                CNRatioDung = 20
                UrineDepth = 250
                ProportionN2Dung = 0.4
                script: same as in Evaluation.NewZealand.FRNLRuakuraMix1.FRNLRuakuraMix1.Field.Management.DefoliationManager
              Operations DefoliationSchedule
                2014-12-15  [DefoliationManager].Script.Defoliate(defoliationType: "Cut", amountDM: 100, amountType: "ResidualDM", duration: 1)
                2015-01-20  [DefoliationManager].Script.Defoliate(defoliationType: "Cut", amountDM: 100, amountType: "ResidualDM", duration: 1)
                2015-03-18  [DefoliationManager].Script.Defoliate(defoliationType: "Cut", amountDM: 100, amountType: "ResidualDM", duration: 1)
                2015-04-20  [DefoliationManager].Script.Defoliate(defoliationType: "Cut", amountDM: 100, amountType: "ResidualDM", duration: 1)
                2015-06-08  [DefoliationManager].Script.Defoliate(defoliationType: "Cut", amountDM: 100, amountType: "ResidualDM", duration: 1)
                2015-09-07  [DefoliationManager].Script.Defoliate(defoliationType: "Cut", amountDM: 100, amountType: "ResidualDM", duration: 1)
                2015-10-14  [DefoliationManager].Script.Defoliate(defoliationType: "Cut", amountDM: 100, amountType: "ResidualDM", duration: 1)
                2015-11-17  [DefoliationManager].Script.Defoliate(defoliationType: "Cut", amountDM: 100, amountType: "ResidualDM", duration: 1)
                2015-12-21  [DefoliationManager].Script.Defoliate(defoliationType: "Cut", amountDM: 100, amountType: "ResidualDM", duration: 1)
                2016-01-21  [DefoliationManager].Script.Defoliate(defoliationType: "Cut", amountDM: 100, amountType: "ResidualDM", duration: 1)
                2016-03-08  [DefoliationManager].Script.Defoliate(defoliationType: "Cut", amountDM: 100, amountType: "ResidualDM", duration: 1)
                2016-05-25  [DefoliationManager].Script.Defoliate(defoliationType: "Cut", amountDM: 100, amountType: "ResidualDM", duration: 1)
                2016-08-18  [DefoliationManager].Script.Defoliate(defoliationType: "Cut", amountDM: 100, amountType: "ResidualDM", duration: 1)
                2016-09-21  [DefoliationManager].Script.Defoliate(defoliationType: "Cut", amountDM: 100, amountType: "ResidualDM", duration: 1)
                2016-10-26  [DefoliationManager].Script.Defoliate(defoliationType: "Cut", amountDM: 100, amountType: "ResidualDM", duration: 1)
                2016-11-30  [DefoliationManager].Script.Defoliate(defoliationType: "Cut", amountDM: 100, amountType: "ResidualDM", duration: 1)
                2016-12-10  [DefoliationManager].Script.Defoliate(defoliationType: "Cut", amountDM: 100, amountType: "ResidualDM", duration: 1)
              Manager ExtraVariables
                script: same as in Evaluation.NewZealand.FRNLRuakuraMix1.FRNLRuakuraMix1.Field.Management.ExtraVariables
              Manager SettingUpParams
                setParamStartDate = 12/01/2014 00:00:00
                setParamHeight = 250
```csharp
// Set some plant parameters, for tests and development
// Following suggestions by Val Snow: Plant competition seem to be better done if heights are all the same (maybe due to some issue/feature of MicroClimate)

using APSIM.Shared.Utilities;
using System.Xml.Serialization;
using Models.PMF;
using Models.Soils;
using Models;
using System.Text;
using System.Collections.Generic;
using Models.Core;
using System;

namespace Models
{
    [Serializable]
    public class Script : Model
    {
        [Link] Clock Clock;
        [Link] Zone myZone;


        //User inputs from properties tab
        [Separator("Setting up some parameters of plants")]
        [Description(" Enter the date to set plant parameters (dd/mm/yyyy):")]
        public DateTime setParamStartDate { get; set; }
        [Description(" Enter the height to set all plants to (mm):")]
        public double setParamHeight { get; set; }


        //Internal variables


        [EventSubscribe("StartOfSimulation")]
        private void OnSimulationCommencing(object sender, EventArgs e)
        {
            // make sure that manager will work when startDate<simulationStartDay
            if (Clock.Today > setParamStartDate)
                setParamStartDate = Clock.Today;
        }

        [EventSubscribe("StartOfDay")]
        private void OnStartOfDay(object sender, EventArgs e)
        {
            // make sure that rotation start when startDate<simulationStartDay
            if (Clock.Today == setParamStartDate)
            {
                double[] xVals = new double[] {0, 10};
                double[] yVals = new double[] {setParamHeight, setParamHeight};
                myZone.Set("Chicory.Leaf.HeightFunction.XYPairs.X", xVals);
                myZone.Set("Chicory.Leaf.HeightFunction.XYPairs.Y", yVals);
                myZone.Set("PlantainForage.Leaf.HeightFunction.XYPairs.X", xVals);
                myZone.Set("PlantainForage.Leaf.HeightFunction.XYPairs.Y", yVals);
                /*myZone.Set("AGPWhiteClover.PlantHeightMaximum", setParamHeight);
                myZone.Set("AGPWhiteClover.PlantHeightMinimum", setParamHeight);
                myZone.Set("AGPRyegrass.PlantHeightMaximum", setParamHeight);
                myZone.Set("AGPRyegrass.PlantHeightMinimum", setParamHeight);
                myZone.Set("AGPLucerne.PlantHeightMaximum", setParamHeight);
                myZone.Set("AGPLucerne.PlantHeightMinimum", setParamHeight);*/
            }
        }
    }
}
```
            MicroClimate: a_interception=0; b_interception=1; c_interception=0; d_interception=0; SoilHeatFluxFraction=0.4; MinimumHeightDiffForNewLayer=0; NightInterceptionFraction=0.5; ReferenceHeight=2
            Irrigation
            Fertiliser
            SurfaceOrganicMatter: InitialResidueName=grass; InitialResidueType=grass; InitialResidueMass=500; InitialStandingFraction=0; InitialCPR=0; InitialCNR=40
            Soil: SoilType=Typic Udivitrand (US), Typic Orthic Allophanic Soil (NZ); LocalName=Horotiu Silt Loam; Site=Ruakura; NearestTown=Hamilton; Region=Waikato; Country=New Zealand; Latitude=0; Longitude=0
              DataSource=Based primarily on data from Close et al (2003), complemented with NZ NSD.
              Physical
                Thickness  ParticleSizeClay  BD     AirDry  LL15   DUL    SAT    KS
                200        20                0.88   0.07    0.22   0.421  0.587  507.8
                200        18.5              0.85   0.21    0.219  0.327  0.623  4445.1
                130        11                1.009  0.177   0.177  0.314  0.572  7262
                140        6.5               1.055  0.139   0.139  0.291  0.536  11928
                380        5.1               1.055  0.125   0.125  0.182  0.504  25031
                230        3.8               0.839  0.102   0.102  0.123  0.439  28410.4
                220        2.4               0.695  0.083   0.083  0.101  0.363  42658.3
                SoilCrop ChicorySoil: LL=[0.22, 0.219, 0.177, 0.139, 0.125, 0.102, 0.083]; KL=[0.07, 0.058, 0.038, 0.025, 0.01, 0.004, 0.002]; XF=[1, 1, 1, 1, 1, 1, 1]
                SoilCrop PlantainForageSoil: LL=[0.22, 0.219, 0.177, 0.139, 0.125, 0.102, 0.083]; KL=[0.08, 0.07, 0.05, 0.03, 0.01, 0.003, 0]; XF=[1, 1, 1, 1, 1, 1, 1]
                SoilCrop AGPRyegrassSoil: LL=[0.22, 0.219, 0.177, 0.139, 0.125, 0.102, 0.083]; KL=[0.1, 0.085, 0.055, 0.02, 0.005, 0, 0]; XF=[1, 1, 1, 1, 1, 1, 1]
                SoilCrop WhiteCloverSoil: LL=[0.22, 0.219, 0.177, 0.139, 0.125, 0.102, 0.083]; KL=[0.085, 0.077, 0.04, 0.01, 0.001, 0, 0]; XF=[1, 1, 1, 1, 1, 1, 1]
                SoilCrop AGPWhiteCloverSoil: LL=[0.22, 0.219, 0.177, 0.139, 0.125, 0.102, 0.083]; KL=[0.085, 0.05, 0, 0, 0, 0, 0]; XF=[1, 1, 1, 1, 1, 1, 1]
                SoilCrop LucerneSoil: LL=[0.22, 0.219, 0.177, 0.139, 0.125, 0.102, 0.083]; KL=[0.06, 0.05, 0.035, 0.025, 0.015, 0.01, 0.01]; XF=[1, 1, 1, 1, 1, 1, 1]
                SoilCrop AGPLucerneSoil: LL=[0.22, 0.219, 0.177, 0.139, 0.125, 0.102, 0.083]; KL=[0.06, 0.05, 0.035, 0.025, 0.015, 0.01, 0.01]; XF=[1, 1, 1, 1, 1, 1, 1]
              WaterBalance SoilWater: same as Evaluation.NewZealand.FRNLRuakuraMix1.FRNLRuakuraMix1.Field.Soil.SoilWater
              Organic: same as Evaluation.NewZealand.FRNLRuakuraMix1.FRNLRuakuraMix1.Field.Soil.Organic
              Chemical: Thickness=[200, 200, 130, 140, 380, 230, 220]; PH=[6, 6, 6, 6, 6, 6, 6]; PHUnits=Water
              SoilNitrogen: fom_types=[default, manure, mucuna, lablab, shemp, stable]; fract_carb=[0.2, 0.3, 0.54, 0.57, 0.45, 0]; fract_cell=[0.7, 0.3, 0.37, 0.37, 0.47, 0.1]; fract_lign=[0.1, 0.4, 0.09, 0.06, 0.08, 0.9]; NPartitionApproach=0
              CERESSoilTemperature Temperature
              Water: Thickness=[200, 200, 130, 140, 380, 230, 220]; InitialValues=[0.4009, 0.3162, 0.3003, 0.2758, 0.1763, 0.1209, 0.0992]; InitialPAWmm=118.206; RelativeTo=LL15; FilledFromTop=false
              SoilNitrogenNO3 NO3: same as Evaluation.NewZealand.FRNLRuakuraMix1.FRNLRuakuraMix1.Field.Soil.NO3
              SoilNitrogenNH4 NH4: same as Evaluation.NewZealand.FRNLRuakuraMix1.FRNLRuakuraMix1.Field.Soil.NH4
              SoilNitrogenUrea Urea: same as Evaluation.NewZealand.FRNLRuakuraMix1.FRNLRuakuraMix1.Field.Soil.Urea
            Plant Chicory
            Plant PlantainForage
            PastureSpecies AGPRyegrass: same as Evaluation.NewZealand.FRNLRuakuraMix1.FRNLRuakuraMix1.Field.AGPRyegrass
            PastureSpecies AGPLucerne: doyGermination=275; daysEmergenceToAnthesis=120; daysAnthesisToMaturity=85; degreesDayForAnthesis=1100; degreesDayForMaturity=900; daysAnnualsFactor=45; InitialShootDM=500; InitialRootDM=250; InitialRootDepth=750; initialDMFractionsGrasses=[0.15, 0.25, 0.25, 0.05, 0.05, 0.1, 0.1, 0.05, 0, 0, 0]; initialDMFractionsForbs=[0.2, 0.2, 0.15, 0.05, 0.1, 0.15, 0.1, 0.05, 0, 0, 0]; PhotosyntheticEfficiency=0.01; PhotosynthesisCurveFactor=0.8; FractionPAR=0.5; ReferenceCO2=380; CO2EffectScaleFactor=700; CO2EffectOffsetFactor=600; CO2EffectMinimum=0.7; CO2EffectExponent=2; ReproSeasonDurationCoeff=2; ReproSeasonShouldersLengthFactor=1; ReproSeasonOnsetDurationFactor=0.6; RelativeTurnoverEmerging=2; DetachmentDroughtCoefficient=3; DetachmentDroughtEffectMin=0.1; TurnoverStockFactor=0.01; TurnoverDefoliationEffectMin=0.025; MinimumGreenLeafProp=0.8; MinimumGreenRootProp=0.5
              initialDMFractionsLegumes=[0.16, 0.23, 0.22, 0.05, 0.03, 0.05, 0.05, 0.01, 0.04, 0.08, 0.08]
              LinearInterpolationFunction FVPDFunction
            PastureSpecies AGPWhiteClover: same as Evaluation.NewZealand.FRNLRuakuraMix1.FRNLRuakuraMix1.Field.AGPWhiteClover
            Report: EventNames=[Clock].DoReport
              VariableNames:
                [Clock].Today as Date
                [Clock].Today.DayOfYear as DayOfYear
                [Weather].Radn as SolarRadiation
                ([Chicory].Leaf.RadiationIntercepted+[PlantainForage].Leaf.RadiationIntercepted+[AGPWhiteClover].InterceptedRadn+[AGPRyegrass].InterceptedRadn+[AGPLucerne].InterceptedRadn) as InterceptedRadiation
                [Chicory].Leaf.RadiationIntercepted as Chicory.RadiationIntercepted
                [PlantainForage].Leaf.RadiationIntercepted as Plantain.RadiationIntercepted
                [AGPRyegrass].InterceptedRadn as Ryegrass.RadiationIntercepted
                [AGPWhiteClover].InterceptedRadn as WhiteClover.RadiationIntercepted
                [AGPLucerne].InterceptedRadn as Lucerne.RadiationIntercepted
                [Weather].Rain as Rainfall
                [Irrigation].IrrigationApplied as IrrigationApplied
                [MicroClimate].PrecipitationInterception as PrecipitationInterception
                [MicroClimate].PetTotal
                [Soil].SoilWater.Eo as Eo
                [Soil].SoilWater.Es as Evaporation
                ([Chicory].Leaf.Transpiration+[PlantainForage].Leaf.Transpiration+sum([AGPWhiteClover].WaterUptake)+sum([AGPRyegrass].WaterUptake)+sum([AGPLucerne].WaterUptake)) as Transpiration
                [Soil].SoilWater.pond as PondedWater
                [Soil].SoilWater.Drainage as Drainage
                [Soil].SoilWater.Runoff as Runoff
                sum([Soil].SoilWater.LateralOutflow) as LateralFlow
                sum([Soil].Water.MM) as TotalSWC
                sum([Soil].Physical.DULmm) as TotalDUL
                sum([Soil].Physical.LL15mm) as TotalLL15
                [Soil].Water.Volumetric[1] as SWCTopLayer
                [Soil].Physical.DUL[1] as DULTopLayer
                [Fertiliser].NitrogenApplied as FertiliserN
                sum([Soil].SoilNitrogen.Denitrification) as DenitrifiedN
                ([Soil].SoilWater.LeachNH4 + [Soil].SoilWater.LeachNO3) as LeachedN
                (([Chicory].Root.NTakenUp+[PlantainForage].Root.NTakenUp+[AGPWhiteClover].SoilUptakeN+[AGPRyegrass].SoilUptakeN+[AGPLucerne].SoilUptakeN) as UptakeN
                sum([Soil].SoilNitrogen.MineralisedN) as MineralisedSoilN
                sum([Soil].SoilNitrogen.dlt_n_min_res) as MineralisedSurfOMN
                ([Chicory].Leaf.Detached.N+[Chicory].Stem.Detached.N+[Chicory].Inflorescence.Detached.N+[PlantainForage].Leaf.Detached.N+[PlantainForage].Stem.Detached.N+[PlantainForage].Inflorescence.Detached.N+[AGPWhiteClover].LitterDepositionN*0.1+[AGPRyegrass].LitterDepositionN*0.1+[AGPLucerne].LitterDepositionN*0.1) as DetachedAGN
                ([Chicory].Taproot.Detached.N+[Chicory].Root.Detached.N+[PlantainForage].Taproot.Detached.N+[PlantainForage].Root.Detached.N+[AGPWhiteClover].RootDetachedN*0.1+[AGPRyegrass].RootDetachedN*0.1+[AGPLucerne].RootDetachedN*0.1) as DetachedBGN
                (DetachedAGN + DetachedBGN) as DetachedTotalN
                //(10*([Chicory].Leaf.Detached.N+[Chicory].Stem.Detached.N+[Chicory].Inflorescence.Detached.N+[PlantainForage].Leaf.Detached.N+[PlantainForage].Stem.Detached.N+[PlantainForage].Inflorescence.Detached.N+[WhiteClover].Leaf.Detached.N+[WhiteClover].Petiole.Detached.N+[WhiteClover].Stolon.Detached.N+[WhiteClover].Inflorescence.Detached.N+[Chicory].Taproot.Detached.N+[Chicory].Root.Detached.N+[PlantainForage].Taproot.Detached.N+[PlantainForage].Root.Detached.N+[WhiteClover].Taproot.Detached.N+[WhiteClover].Root.Detached.N)+[AGPRyegrass].LitterDepositionN+[AGPRyegrass].RootDetachedN+[AGPLucerne].LitterDepositionN+[AGPLucerne].RootDetachedN) as DetachedTotalN
                ([AGPWhiteClover].FixedN + [AGPLucerne].FixedN) as FixedN
                [AGPWhiteClover].FixedN as WhiteClover.FixedN
                [AGPLucerne].FixedN as Lucerne.FixedN
                (sum([Soil].Urea.kgha) + sum([Soil].NH4.kgha) + sum([Soil].NO3.kgha)) as SoilNContent
                sum([Soil].Urea.kgha) as SoilUrea
                sum([Soil].NH4.kgha) as SoilNH4
                sum([Soil].NO3.kgha) as SoilNO3
                (sum([Soil].NH4.kgha[1:4])+sum([Soil].NO3.kgha[1:4])) as TopSoilN
                [SurfaceOrganicMatter].N as TotalSurfOMN
                sum([Soil].SoilNitrogen.FOMN) as TotalFOMN
                sum([Soil].SoilNitrogen.HumicN) as TotalHumicN
                sum([Soil].SoilNitrogen.MicrobialN as TotalMicrobialN
                [DefoliationManager].Script.RotationHarvestedDM as RotationHarvestedWt
                [DefoliationManager].Script.PreHarvestDM
                [DefoliationManager].Script.PostHarvestDM
                [DefoliationManager].Script.DefoliatedN as NTakenOff
                [DefoliationManager].Script.HarvestedN
                (10*[DefoliationManager].Script.RemovedN) as Defoliate.Script.RemovedN
                [DefoliationManager].Script.DefoliatedWt as HarvestedWt
                ([DefoliationManager].Script.RemovedN/([DefoliationManager].Script.RemovedWt+0.000001) as RemovedNConc
                [ExtraVariables].Script.AccumHarvestedWt as CumulativeHarvestedWt
                [ExtraVariables].Script.AccumHarvestedN as CumulativeNTakenOff
                ([Chicory].Total.Wt+[PlantainForage].Total.Wt+[AGPWhiteClover].TotalWt*0.1+[AGPRyegrass].TotalWt*0.1+[AGPLucerne].TotalWt*0.1) as TotalPlantWt
                ([Chicory].AboveGroundLive.Wt+[PlantainForage].AboveGroundLive.Wt+[AGPWhiteClover].AboveGroundLiveWt*0.1+[AGPRyegrass].AboveGroundLiveWt*0.1+[AGPLucerne].AboveGroundLiveWt*0.1+[Chicory].BelowGround.Wt+[PlantainForage].BelowGround.Wt+[AGPWhiteClover].BelowGroundWt*0.1+[AGPRyegrass].BelowGroundWt*0.1+[AGPLucerne].BelowGroundWt*0.1) as TotalPlantLiveWt
                ([Chicory].AboveGround.Wt+[PlantainForage].AboveGround.Wt+[AGPWhiteClover].AboveGroundWt*0.1+[AGPRyegrass].AboveGroundWt*0.1+[AGPLucerne].AboveGroundWt*0.1) as AboveGroundWt
                ([Chicory].BelowGround.Wt+[PlantainForage].BelowGround.Wt+[AGPWhiteClover].BelowGroundWt*0.1+[AGPRyegrass].BelowGroundWt*0.1+[AGPLucerne].BelowGroundWt*0.1) as BelowGroundWt
                ([Chicory].Total.N+[PlantainForage].Total.N+[AGPWhiteClover].TotalN*0.1+[AGPRyegrass].TotalN*0.1+[AGPLucerne].TotalN*0.1) as TotalPlantN
                ([Chicory].AboveGround.N+[PlantainForage].AboveGround.N+[AGPWhiteClover].AboveGroundN*0.1+[AGPRyegrass].AboveGroundN*0.1+[AGPLucerne].AboveGroundN*0.1) as AboveGroundN
                ([Chicory].BelowGround.N+[PlantainForage].BelowGround.N+[AGPWhiteClover].BelowGroundN*0.1+[AGPRyegrass].BelowGroundN*0.1+[AGPLucerne].BelowGroundN*0.1) as BelowGroundN
                (([Chicory].AboveGround.N+[PlantainForage].AboveGround.N+[AGPWhiteClover].AboveGroundN*0.1+[AGPRyegrass].AboveGroundN*0.1+[AGPLucerne].AboveGroundN*0.1)/([Chicory].AboveGround.Wt+[PlantainForage].AboveGround.Wt+[AGPWhiteClover].AboveGroundWt*0.1+[AGPRyegrass].AboveGroundWt*0.1+[AGPLucerne].AboveGroundWt*0.1+0.000001)) as AboveGroundNConc
                (([Chicory].BelowGround.N+[PlantainForage].BelowGround.N+[AGPWhiteClover].BelowGroundN*0.1+[AGPRyegrass].BelowGroundN*0.1+[AGPLucerne].BelowGroundN*0.1)/([Chicory].BelowGround.Wt+[PlantainForage].BelowGround.Wt+[AGPWhiteClover].BelowGroundWt*0.1+[AGPRyegrass].BelowGroundWt*0.1+[AGPLucerne].BelowGroundWt*0.1+0.000001)) as BelowGroundNConc
                ([Chicory].AboveGroundLive.Wt+[PlantainForage].AboveGroundLive.Wt+[AGPWhiteClover].AboveGroundLiveWt*0.1+[AGPRyegrass].AboveGroundLiveWt*0.1+[AGPLucerne].AboveGroundLiveWt*0.1) as AboveGroundLiveWt
                ([Chicory].AboveGroundLive.N+[PlantainForage].AboveGroundLive.N+[AGPWhiteClover].AboveGroundLiveN*0.1+[AGPRyegrass].AboveGroundLiveN*0.1+[AGPLucerne].AboveGroundLiveN*0.1) as AboveGroundDeadWt
                ([Chicory].BelowGround.Wt+[PlantainForage].BelowGround.Wt+[AGPWhiteClover].BelowGroundWt*0.1+[AGPRyegrass].BelowGroundWt*0.1+[AGPLucerne].BelowGroundWt*0.1) as BelowGroundLiveWt
                (([Chicory].AboveGroundLive.N+[PlantainForage].AboveGroundLive.N+[AGPWhiteClover].AboveGroundLiveN*0.1+[AGPRyegrass].AboveGroundLiveN*0.1+[AGPLucerne].AboveGroundLiveN*0.1)/([Chicory].AboveGroundLive.Wt+[PlantainForage].AboveGroundLive.Wt+[AGPWhiteClover].AboveGroundLiveWt*0.1+[AGPRyegrass].AboveGroundLiveWt*0.1+[AGPLucerne].AboveGroundLiveWt*0.1+0.000001)) as AboveGroundLiveNc
                [ExtraVariables].Script.HerbageNConc as HerbageNConc
                [Chicory].Total.Wt
                ([Chicory].AboveGroundLive.Wt+[Chicory].BelowGroundLive.Wt) as Chicory.TotalLive.Wt
                [Chicory].AboveGround.Wt
                [Chicory].BelowGround.Wt
                [Chicory].AboveGroundLive.Wt
                ([Chicory].AboveGround.Wt-[Chicory].AboveGroundLive.Wt) as Chicory.AboveGroundDead.Wt
                [Chicory].BelowGroundLive.Wt
                [Chicory].Total.N
                [Chicory].AboveGround.N
                [Chicory].BelowGround.N
                [Chicory].AboveGround.NConc
                [Chicory].BelowGround.NConc
                [Chicory].AboveGroundLive.NConc
                (([Chicory].Leaf.N+[Chicory].Stem.N+[Chicory].Inflorescence.N)/(([Chicory].Leaf.Wt+[Chicory].Stem.Wt+[Chicory].Inflorescence.Wt+0.000001)) as ChicoryHerbageNConc
                [PlantainForage].Total.Wt
                ([PlantainForage].AboveGroundLive.Wt+[PlantainForage].BelowGroundLive.Wt) as Plantain.TotalLive.Wt
                [PlantainForage].AboveGround.Wt
                [PlantainForage].BelowGround.Wt
                [PlantainForage].AboveGroundLive.Wt
                ([PlantainForage].AboveGround.Wt-[PlantainForage].AboveGroundLive.Wt) as Plantain.AboveGroundDead.Wt
                [PlantainForage].BelowGroundLive.Wt
                [PlantainForage].Total.N
                [PlantainForage].AboveGround.N
                [PlantainForage].BelowGround.N
                [PlantainForage].AboveGround.NConc
                [PlantainForage].BelowGround.NConc
                [PlantainForage].AboveGroundLive.NConc
                (([PlantainForage].Leaf.N+[PlantainForage].Stem.N+[PlantainForage].Inflorescence.N)/(([PlantainForage].Leaf.Wt+[PlantainForage].Stem.Wt+[PlantainForage].Inflorescence.Wt+0.000001)) as PlantainHerbageNConc
                ([AGPRyegrass].TotalWt*0.1) as Ryegrass.Total.Wt
                ([AGPRyegrass].AboveGroundLiveWt*0.1+[AGPRyegrass].BelowGroundWt*0.1) as Ryegrass.TotalLive.Wt
                ([AGPRyegrass].AboveGroundWt*0.1) as Ryegrass.AboveGround.Wt
                ([AGPRyegrass].BelowGroundWt*0.1) as Ryegrass.BelowGround.Wt
                ([AGPRyegrass].AboveGroundLiveWt*0.1) as Ryegrass.AboveGroundLive.Wt
                ([AGPRyegrass].AboveGroundDeadWt*0.1) as Ryegrass.AboveGroundDead.Wt
                ([AGPRyegrass].BelowGroundWt*0.1) as Ryegrass.BelowGroundLive.Wt
                ([AGPRyegrass].TotalN*0.1) as Ryegrass.Total.N
                ([AGPRyegrass].AboveGroundN*0.1) as Ryegrass.AboveGround.N
                ([AGPRyegrass].BelowGroundN*0.1) as Ryegrass.BelowGround.N
                [AGPRyegrass].AboveGroundNConc as Ryegrass.AboveGround.NConc
                ([AGPRyegrass].BelowGroundN/([AGPRyegrass].BelowGroundWt+0.000001)) as Ryegrass.BelowGround.NConc
                ([AGPRyegrass].AboveGroundLiveN/([AGPRyegrass].AboveGroundLiveWt+0.000001)) as Ryegrass.AboveGroundLive.NConc
                [AGPRyegrass].Standing.NConc as RyegrassHerbageNConc
                ([AGPLucerne].TotalWt*0.1) as Lucerne.Total.Wt
                ([AGPLucerne].AboveGroundLiveWt*0.1+[AGPLucerne].BelowGroundWt*0.1) as Lucerne.TotalLive.Wt
                ([AGPLucerne].AboveGroundWt*0.1) as Lucerne.AboveGround.Wt
                ([AGPLucerne].BelowGroundWt*0.1) as Lucerne.BelowGround.Wt
                ([AGPLucerne].AboveGroundLiveWt*0.1) as Lucerne.AboveGroundLive.Wt
                ([AGPLucerne].AboveGroundDeadWt*0.1) as Lucerne.AboveGroundDead.Wt
                ([AGPLucerne].BelowGroundWt*0.1) as Lucerne.BelowGroundLive.Wt
                ([AGPLucerne].TotalN*0.1) as Lucerne.Total.N
                ([AGPLucerne].AboveGroundN*0.1) as Lucerne.AboveGround.N
                ([AGPLucerne].BelowGroundN*0.1) as Lucerne.BelowGround.N
                [AGPLucerne].AboveGroundNConc as Lucerne.AboveGround.NConc
                ([AGPLucerne].BelowGroundN/([AGPLucerne].BelowGroundWt+0.000001)) as Lucerne.BelowGround.NConc
                ([AGPLucerne].AboveGroundLiveN/([AGPLucerne].AboveGroundLiveWt+0.000001)) as Lucerne.AboveGroundLive.NConc
                [AGPLucerne].Standing.NConc as LucerneHerbage.NConc
                ([AGPWhiteClover].TotalWt*0.1) as WhiteClover.Total.Wt
                ([AGPWhiteClover].AboveGroundLiveWt*0.1+[AGPWhiteClover].BelowGroundWt*0.1) as WhiteClover.TotalLive.Wt
                ([AGPWhiteClover].AboveGroundWt*0.1) as WhiteClover.AboveGround.Wt
                ([AGPWhiteClover].BelowGroundWt*0.1) as WhiteClover.BelowGround.Wt
                ([AGPWhiteClover].AboveGroundLiveWt*0.1) as WhiteClover.AboveGroundLive.Wt
                ([AGPWhiteClover].AboveGroundDeadWt*0.1) as WhiteClover.AboveGroundDead.Wt
                ([AGPWhiteClover].BelowGroundWt*0.1) as WhiteClover.BelowGroundLive.Wt
                ([AGPWhiteClover].TotalN*0.1) as WhiteClover.Total.N
                ([AGPWhiteClover].AboveGroundN*0.1) as WhiteClover.AboveGround.N
                ([AGPWhiteClover].BelowGroundN*0.1) as WhiteClover.BelowGround.N
                [AGPWhiteClover].AboveGroundNConc as WhiteClover.AboveGround.NConc
                ([AGPWhiteClover].BelowGroundN/([AGPLucerne].BelowGroundWt+0.000001)) as WhiteClover.BelowGround.NConc
                ([AGPWhiteClover].AboveGroundLiveN/([AGPWhiteClover].AboveGroundLiveWt+0.000001)) as WhiteClover.AboveGroundLive.NConc
                [AGPWhiteClover].Standing.NConc as WhiteCloverHerbage.NConc
                ([Chicory].AboveGround.Wt/([Chicory].AboveGround.Wt+[PlantainForage].AboveGround.Wt+[AGPWhiteClover].AboveGroundWt*0.1+[AGPRyegrass].AboveGroundWt*0.1+[AGPLucerne].AboveGroundWt*0.1+0.000001)) as Chicory.BiomassFraction
                ([PlantainForage].AboveGround.Wt/([Chicory].AboveGround.Wt+[PlantainForage].AboveGround.Wt+[AGPWhiteClover].AboveGroundWt*0.1+[AGPRyegrass].AboveGroundWt*0.1+[AGPLucerne].AboveGroundWt*0.1+0.000001)) as Plantain.BiomassFraction
                ([AGPWhiteClover].AboveGroundWt*0.1/([Chicory].AboveGround.Wt+[PlantainForage].AboveGround.Wt+[AGPWhiteClover].AboveGroundWt*0.1+[AGPRyegrass].AboveGroundWt*0.1+[AGPLucerne].AboveGroundWt*0.1+0.000001)) as WhiteClover.BiomassFraction
                ([AGPRyegrass].AboveGroundWt*0.1/([Chicory].AboveGround.Wt+[PlantainForage].AboveGround.Wt+[AGPWhiteClover].AboveGroundWt*0.1+[AGPRyegrass].AboveGroundWt*0.1+[AGPLucerne].AboveGroundWt*0.1+0.000001)) as Ryegrass.BiomassFraction
                ([AGPLucerne].AboveGroundWt*0.1/([Chicory].AboveGround.Wt+[PlantainForage].AboveGround.Wt+[AGPWhiteClover].AboveGroundWt*0.1+[AGPRyegrass].AboveGroundWt*0.1+[AGPLucerne].AboveGroundWt*0.1+0.000001)) as Lucerne.BiomassFraction
                ([Chicory].AboveGround.N/([Chicory].AboveGround.N+[PlantainForage].AboveGround.N+[AGPWhiteClover].AboveGroundN*0.1+[AGPRyegrass].AboveGroundN*0.1+[AGPLucerne].AboveGroundN*0.1+0.000001)) as Chicory.NitrogenFraction
                ([PlantainForage].AboveGround.N/([Chicory].AboveGround.N+[PlantainForage].AboveGround.N+[AGPWhiteClover].AboveGroundN*0.1+[AGPRyegrass].AboveGroundN*0.1+[AGPLucerne].AboveGroundN*0.1+0.000001)) as Plantain.NitrogenFraction
                ([AGPWhiteClover].AboveGroundN*0.1/([Chicory].AboveGround.N+[PlantainForage].AboveGround.N+[AGPWhiteClover].AboveGroundN*0.1+[AGPRyegrass].AboveGroundN*0.1+[AGPLucerne].AboveGroundN*0.1+0.000001)) as WhiteClover.NitrogenFraction
                ([AGPRyegrass].AboveGroundN*0.1/([Chicory].AboveGround.N+[PlantainForage].AboveGround.N+[AGPWhiteClover].AboveGroundN*0.1+[AGPRyegrass].AboveGroundN*0.1+[AGPLucerne].AboveGroundN*0.1+0.000001)) as Ryegrass.NitrogenFraction
                ([AGPLucerne].AboveGroundN*0.1/([Chicory].AboveGround.N+[PlantainForage].AboveGround.N+[AGPWhiteClover].AboveGroundN*0.1+[AGPRyegrass].AboveGroundN*0.1+[AGPLucerne].AboveGroundN*0.1+0.000001)) as Lucerne.NitrogenFraction
                ([Chicory].Leaf.CoverTotal+[PlantainForage].Leaf.CoverTotal+[AGPWhiteClover].CoverTotal+[AGPRyegrass].CoverTotal+[AGPLucerne].CoverTotal) as CoverTotal
                ([Chicory].Leaf.CoverDead+[PlantainForage].Leaf.CoverDead+[AGPWhiteClover].CoverDead+[AGPRyegrass].CoverDead+[AGPLucerne].CoverDead) as CoverDead
                [MicroClimate].CanopyCover
                ([Chicory].Leaf.LAI+[PlantainForage].Leaf.LAI+[AGPWhiteClover].LAIGreen+[AGPRyegrass].LAIGreen+[AGPLucerne].LAIGreen) as LAIgreen
                ([Chicory].Leaf.LAIDead+[PlantainForage].Leaf.LAIDead+[AGPWhiteClover].LAIDead+[AGPRyegrass].LAIDead+[AGPLucerne].LAIDead) as LAIdead
                (([Chicory].Leaf.Height+[PlantainForage].Leaf.Height+[AGPWhiteClover].Height+[AGPRyegrass].Height+[AGPLucerne].Height)/5) as AverageShootHeight
                (([Chicory].Root.Depth+[PlantainForage].Root.Depth+[AGPWhiteClover].RootDepth+[AGPRyegrass].RootDepth+[AGPLucerne].RootDepth)/5) as AverageRootDepth
                ([Chicory].Root.LengthDensity+[PlantainForage].Root.LengthDensity+[AGPWhiteClover].Root.LengthDensity+[AGPRyegrass].Root.LengthDensity+[AGPLucerne].Root.LengthDensity) as Total.RootLengthDensity
                [Chicory].Leaf.CoverTotal
                [PlantainForage].Leaf.CoverTotal
                [AGPRyegrass].CoverTotal as Ryegrass.CoverTotal
                [AGPLucerne].CoverTotal as Lucerne.CoverTotal
                [AGPWhiteClover].CoverTotal as WhiteClover.CoverTotal
                [Chicory].Population
                [PlantainForage].Population
                (0*[AGPRyegrass].TotalWt) as Ryegrass.Population
                (0*[AGPLucerne].TotalWt) as Lucerne.Population
                (0*[AGPWhiteClover].TotalWt) as WhiteClover.Population
                [Chicory].Leaf.Height
                [PlantainForage].Leaf.Height
                [AGPWhiteClover].Height as WhiteClover.Height
                [AGPRyegrass].Height as Ryegrass.Height
                [AGPLucerne].Height as Lucerne.Height
                [Chicory].Root.Depth
                [PlantainForage].Root.Depth
                [AGPWhiteClover].RootDepth as WhiteClover.Root.Depth
                [AGPRyegrass].RootDepth as Ryegrass.Root.Depth
                [AGPLucerne].RootDepth as Lucerne.Root.Depth
                [Chicory].Root.LengthDensity
                [PlantainForage].Root.LengthDensity
                [AGPWhiteClover].Root.LengthDensity as WhiteClover.Root.LengthDensity
                [AGPRyegrass].Root.LengthDensity as Ryegrass.Root.LengthDensity
                [AGPLucerne].Root.LengthDensity as Lucerne.Root.LengthDensity
                [Chicory].Leaf.LAI
                [PlantainForage].Leaf.LAI
                [AGPWhiteClover].LAI as WhiteClover.LAI
                [AGPRyegrass].LAI as Ryegrass.LAI
                [AGPLucerne].LAI as Lucerne.LAI
                [Chicory].ShootRootRatio
                ([Chicory].AboveGroundLive.Wt/([Chicory].AboveGroundLive.Wt+[Chicory].BelowGround.Wt+0.000001)) as Chicory.CurrentAboveGroundFraction
                [PlantainForage].ShootRootRatio
                ([PlantainForage].AboveGroundLive.Wt/([PlantainForage].AboveGroundLive.Wt+[PlantainForage].BelowGround.Wt+0.000001)) as Plantain.CurrentAboveGroundFraction
                ([AGPWhiteClover].AboveGroundLiveWt/([AGPWhiteClover].BelowGroundWt+0.000001)) as WhiteClover.ShootRootRatio
                ([AGPWhiteClover].AboveGroundLiveWt/([AGPWhiteClover].AboveGroundLiveWt+[AGPWhiteClover].BelowGroundWt+0.000001)) as WhiteClover.CurrentAboveGroundFraction
                ([AGPRyegrass].AboveGroundLiveWt/([AGPRyegrass].BelowGroundWt+0.000001)) as Ryegrass.ShootRootRatio
                ([AGPRyegrass].AboveGroundLiveWt/([AGPRyegrass].AboveGroundLiveWt+[AGPRyegrass].BelowGroundWt+0.000001)) as Ryegrass.CurrentAboveGroundFraction
                ([AGPLucerne].AboveGroundLiveWt/([AGPLucerne].BelowGroundWt+0.000001)) as Lucerne.ShootRootRatio
                ([AGPLucerne].AboveGroundLiveWt/([AGPLucerne].AboveGroundLiveWt+[AGPLucerne].BelowGroundWt+0.000001)) as Lucerne.CurrentAboveGroundFraction
                [Chicory].Leaf.Fw
                [Chicory].Leaf.Fn
                [Chicory].Leaf.FNmetabolic
                [Chicory].Leaf.Photosynthesis.FCO2
                [Chicory].Leaf.Photosynthesis.FN
                [Chicory].Leaf.Photosynthesis.FT
                [Chicory].Leaf.Photosynthesis.FW
                [Chicory].Leaf.Photosynthesis.FVPD
                [Chicory].Leaf.FRGR
                [PlantainForage].Leaf.Fw
                [PlantainForage].Leaf.Fn
                [PlantainForage].Leaf.FNmetabolic
                [PlantainForage].Leaf.Photosynthesis.FCO2
                [PlantainForage].Leaf.Photosynthesis.FN
                [PlantainForage].Leaf.Photosynthesis.FT
                [PlantainForage].Leaf.Photosynthesis.FW
                [PlantainForage].Leaf.Photosynthesis.FVPD
                [PlantainForage].Leaf.FRGR
                [AGPRyegrass].GlfNSupply
                [AGPRyegrass].GlfWaterSupply
                [AGPRyegrass].GlfWaterLogging
                [AGPRyegrass].GlfNContent
                [AGPRyegrass].GlfCO2
                [AGPRyegrass].GlfTemperature
                [AGPRyegrass].GlfColdDamage
                [AGPRyegrass].GlfHeatDamage
                [AGPLucerne].GlfNSupply
                [AGPLucerne].GlfWaterSupply
                [AGPLucerne].GlfWaterLogging
                [AGPLucerne].GlfNContent
                [AGPLucerne].GlfCO2
                [AGPLucerne].GlfTemperature
                [AGPLucerne].GlfColdDamage
                [AGPLucerne].GlfHeatDamage
                [AGPWhiteClover].GlfNSupply
                [AGPWhiteClover].GlfWaterSupply
                [AGPWhiteClover].GlfWaterLogging
                [AGPWhiteClover].GlfNContent
                [AGPWhiteClover].GlfCO2
                [AGPWhiteClover].GlfTemperature
                [AGPWhiteClover].GlfColdDamage
                [AGPWhiteClover].GlfHeatDamage
    Folder Denmark
      Experiment FoulumMix1
        Memo
          ###Foulum species competition###

          This simulation setup was based on field trials performed at the the Foulumgaard Experimental Station, Aarhus University, Denmark, between 2013 and 2015.  The trial was part of an experiment studying species competition in multi-species sward in a dairy organic farming context.  This comprises the establishement of plots sown with various species in monoculture and in a few combinations, either varying the number and type of species or the relative sowing rate.  The plots received either no N fertiliser or a nominal annual rate of 250 kgN/ha applied as cattle slurry.  Details of the site and trial can be found in publications ([CongEtAl2017]; [CongAndEriksen2018]; and [CongEtAl2018]).  Here only a selection of plots with mixed pasture species are used, these involved ryegrass, red clover, chicory and ribwort plantain (weeds also occurred, but are not included in the simulation - the fraction of biomass was fairly small).  In these plots ryegrass and red clover were sown in equal proportion with either chicory or plantain; the proportion of forbs was set to either 20% or 60% of the sown population (thus ryegrass and clover populations were, respectively, at 40% or 20% each).  Each treatment combining sowing rate and N inputs had three replicates.  Measurements comprised total yield and respective values for each species.
          Observed data supplied by Wen Feng Cong and Jorgen Eriksen, Aarhus University.

          The soil at the experimental site was a loamy sand (a Typic Hapludult on the USDA classification), the parameters required were derived from data published and slightly adjusted with measurements done at the experimental site ([JacobsenFoulum1989]; [HeidmannFoulum1989]).
          Weather data was obtained from nearby weather station (Aarhus University).
          Simulation of ryegrass is done using the AgPasture model as the PMF version is still under development.
          The cultivars used are those developed for New Zealand conditions, this will need rectifying in the future.
        Factors
          Permutation
            Factor NInputs: Specification=[FertiliserSchedule]
              Operations Nil
              Operations Slurry
                2014-04-01  [SurfaceOrganicMatter].Add(mass: 1022.7, N: 40.9, P: 0.0, type: "fym", name: "slurry")
                2014-04-01  [Fertiliser].Apply(Amount: 50.0, Type: Fertiliser.Types.NH4N, Depth: 5)
                2014-06-04  [SurfaceOrganicMatter].Add(mass: 481.5, N: 19.3, P: 0.0, type: "fym", name: "slurry")
                2014-06-04  [Fertiliser].Apply(Amount: 20.0, Type: Fertiliser.Types.NH4N, Depth: 5)
                2014-07-03  [SurfaceOrganicMatter].Add(mass: 478.6, N: 19.1, P: 0.0, type: "fym", name: "slurry")
                2014-07-03  [Fertiliser].Apply(Amount: 24.4, Type: Fertiliser.Types.NH4N, Depth: 5)
                2014-08-22  [SurfaceOrganicMatter].Add(mass: 560.5, N: 22.4, P: 0.0, type: "fym", name: "slurry")
                2014-08-22  [Fertiliser].Apply(Amount: 19.1, Type: Fertiliser.Types.NH4N, Depth: 5)
                2015-04-07  [SurfaceOrganicMatter].Add(mass: 1022.7, N: 40.9, P: 0.0, type: "fym", name: "slurry")
                2015-04-07  [Fertiliser].Apply(Amount: 50.0, Type: Fertiliser.Types.NH4N, Depth: 5)
                2015-06-10  [SurfaceOrganicMatter].Add(mass: 481.5, N: 19.3, P: 0.0, type: "fym", name: "slurry")
                2015-06-10  [Fertiliser].Apply(Amount: 20.0, Type: Fertiliser.Types.NH4N, Depth: 5)
                2015-07-21  [SurfaceOrganicMatter].Add(mass: 478.6, N: 19.1, P: 0.0, type: "fym", name: "slurry")
                2015-07-21  [Fertiliser].Apply(Amount: 24.4, Type: Fertiliser.Types.NH4N, Depth: 5)
                2015-09-03  [SurfaceOrganicMatter].Add(mass: 560.5, N: 22.4, P: 0.0, type: "fym", name: "slurry")
                2015-09-03  [Fertiliser].Apply(Amount: 19.1, Type: Fertiliser.Types.NH4N, Depth: 5)
            Factor SpeciesMix: Specification=[Sowing]
              Operations NoForbs
                2013-05-06  [RedClover].Sow(population: 250, cultivar: "Rajah", depth: 5, rowSpacing: 150)
                2013-01-01  [AGPRyegrass].EndCrop()
                2013-05-31  [AGPRyegrass].Sow(population: 0, cultivar: "R", depth: 0, rowSpacing: 0)
        Simulation FoulumMix1
          Clock: Start=2013-01-01; End=2015-12-31
          Weather: FileName=Foulum.met
          Summary summaryfile
          SoilArbitrator Soil Arbitrator
          Forages
            Parameters:
              Name                          IsLive  DigestibilityString  FractionConsumable  MinimumAmount  UseDigestibilityFromModel
              SurfaceOrganicMatter.Residue  true    0.7                  1                   100            false
              SurfaceOrganicMatter.Residue  false   0.3                  1                   0              false
              RedClover.Leaf                true    0.7                  1                   100            false
              RedClover.Leaf                false   0.3                  1                   0              false
              RedClover.Petiole             true    0.7                  1                   100            false
              RedClover.Petiole             false   0.3                  1                   0              false
              RedClover.Stem                true    0.7                  1                   100            false
              RedClover.Stem                false   0.3                  1                   0              false
              RedClover.Inflorescence       true    0.7                  1                   100            false
              RedClover.Inflorescence       false   0.3                  1                   0              false
              RedClover.Nodule              true    0.7                  1                   100            false
              RedClover.Nodule              false   0.3                  1                   0              false
              RedClover.Taproot             true    0.7                  1                   100            false
              RedClover.Taproot             false   0.3                  1                   0              false
              RedClover.Root                true    0                    0                   0              false
              RedClover.Root                false   0                    0                   0              false
              AGPRyegrass.Leaf              true    0.7                  1                   100            false
              AGPRyegrass.Leaf              false   0.3                  1                   0              false
              AGPRyegrass.Stem              true    0.7                  1                   100            false
              AGPRyegrass.Stem              false   0.3                  1                   0              false
              AGPRyegrass.Stolon            true    0.7                  1                   100            false
              AGPRyegrass.Stolon            false   0.3                  1                   0              false
          Zone Field: Area=1; Slope=0; AspectAngle=0; Altitude=50
            Folder Management
              Operations Sowing
              Operations BaseNApplication
                2013-05-03  [SurfaceOrganicMatter].Add(mass: 5114, N: 40.9, P: 0.0, type: "fym", name: "slurry")
                2013-05-03  [Fertiliser].Apply(Amount: 50, Type: Fertiliser.Types.NH4N, Depth: 5)
              Operations FertiliserSchedule
              Operations IrrigationSchedulle
                2013-07-17  [Irrigation].Apply(amount: 25)
                2013-08-28  [Irrigation].Apply(amount: 25)
                2014-12-06  [Irrigation].Apply(amount: 33)
                2014-07-04  [Irrigation].Apply(amount: 25)
              Manager DefoliationManager: same as Evaluation.NewZealand.FRNLRuakuraMix2.FRNLRuakuraMix2.Field.Management.DefoliationManager
              Operations DefoliationSchedule
                2013-07-04  [DefoliationManager].Script.Defoliate(defoliationType: "Cut", amountDM: 100, amountType: "ResidualDM", duration: 1)
                2013-10-01  [DefoliationManager].Script.Defoliate(defoliationType: "Cut", amountDM: 100, amountType: "ResidualDM", duration: 1)
                2014-05-22  [DefoliationManager].Script.Defoliate(defoliationType: "Cut", amountDM: 100, amountType: "ResidualDM", duration: 1)
                2014-07-02  [DefoliationManager].Script.Defoliate(defoliationType: "Cut", amountDM: 100, amountType: "ResidualDM", duration: 1)
                2014-08-20  [DefoliationManager].Script.Defoliate(defoliationType: "Cut", amountDM: 100, amountType: "ResidualDM", duration: 1)
                2014-10-06  [DefoliationManager].Script.Defoliate(defoliationType: "Cut", amountDM: 100, amountType: "ResidualDM", duration: 1)
                2015-06-01  [DefoliationManager].Script.Defoliate(defoliationType: "Cut", amountDM: 100, amountType: "ResidualDM", duration: 1)
                2015-07-14  [DefoliationManager].Script.Defoliate(defoliationType: "Cut", amountDM: 100, amountType: "ResidualDM", duration: 1)
                2015-08-24  [DefoliationManager].Script.Defoliate(defoliationType: "Cut", amountDM: 100, amountType: "ResidualDM", duration: 1)
                2015-10-19  [DefoliationManager].Script.Defoliate(defoliationType: "Cut", amountDM: 100, amountType: "ResidualDM", duration: 1)
              Manager ExtraVariables
                script: same as in Evaluation.NewZealand.FRNLRuakuraMix1.FRNLRuakuraMix1.Field.Management.ExtraVariables
              Manager SettingUpParams
                setParamStartDate = 01/01/2013 00:00:00
                setParamHeight = 250
```csharp
// Set some plant parameters, for tests and development
// Following suggestions by Val Snow: Plant competition seem to be better done if heights are all the same (maybe due to some issue/feature of MicroClimate)

using APSIM.Shared.Utilities;
using System.Xml.Serialization;
using Models.PMF;
using Models.Soils;
using Models;
using System.Text;
using System.Collections.Generic;
using Models.Core;
using System;

namespace Models
{
    [Serializable]
    public class Script : Model
    {
        [Link] Clock Clock;
        [Link] Zone myZone;


        //User inputs from properties tab
        [Separator("Setting up some parameters of plants")]
        [Description(" Enter the date to set plant parameters (dd/mm/yyyy):")]
        public DateTime setParamStartDate { get; set; }
        [Description(" Enter the height to set all plants to (mm):")]
        public double setParamHeight { get; set; }


        //Internal variables


        [EventSubscribe("StartOfSimulation")]
        private void OnSimulationCommencing(object sender, EventArgs e)
        {
            // make sure that manager will work when startDate<simulationStartDay
            if (Clock.Today > setParamStartDate)
                setParamStartDate = Clock.Today;
        }

        [EventSubscribe("StartOfDay")]
        private void OnStartOfDay(object sender, EventArgs e)
        {
            // make sure that rotation start when startDate<simulationStartDay
            if (Clock.Today == setParamStartDate)
            {
                double[] xVals = new double[] {0, 10};
                double[] yVals = new double[] {setParamHeight, setParamHeight};
                myZone.Set("RedClover.Leaf.HeightFunction.XYPairs.X", xVals);
                myZone.Set("RedClover.Leaf.HeightFunction.XYPairs.Y", yVals);
                /*myZone.Set("Ryegrass.PlantHeightMaximum", setParamHeight);
                myZone.Set("Ryegrass.PlantHeightMinimum", setParamHeight);*/
            }
        }
    }
}
```
            MicroClimate: a_interception=0; b_interception=1; c_interception=0; d_interception=0; SoilHeatFluxFraction=0.4; MinimumHeightDiffForNewLayer=0; NightInterceptionFraction=0.5; ReferenceHeight=2
            Irrigation
            Fertiliser
            SurfaceOrganicMatter: InitialResidueName=grass; InitialResidueType=grass; InitialResidueMass=1000; InitialStandingFraction=0; InitialCPR=0; InitialCNR=40
            Soil: SoilType=Typic Hapludult (US); LocalName=Loamy Sandy Soil; Site=Foulum; NearestTown=Tjelle; Region=Viborg; Country=Denmark; Latitude=0; Longitude=0
              DataSource=Based on data published by Jacobsen (1989) and Heidmann et al (1989)
              Chemical: Thickness=[200, 250, 250, 300, 250, 250]; PH=[6, 6, 6, 6, 6, 6]; PHUnits=Water
              Physical
                Thickness  ParticleSizeClay  BD    AirDry  LL15   DUL    SAT    KS
                200        6.7               1.47  0.024   0.072  0.299  0.42   1467
                250        6.2               1.44  0.053   0.056  0.268  0.437  1039
                250        7.1               1.65  0.054   0.054  0.182  0.377  4748
                300        4.6               1.73  0.049   0.049  0.2    0.342  882
                250        7.7               1.76  0.054   0.054  0.219  0.305  655
                250        7.7               1.86  0.062   0.062  0.219  0.294  612
                SoilCrop ChicorySoil: LL=[0.072, 0.056, 0.054, 0.049, 0.054, 0.062]; KL=[0.07, 0.06, 0.03, 0.01, 0.004, 0.002]; XF=[1, 1, 1, 1, 1, 1]
                SoilCrop PlantainForageSoil: LL=[0.072, 0.056, 0.054, 0.049, 0.054, 0.062]; KL=[0.08, 0.07, 0.04, 0.013, 0.005, 0]; XF=[1, 1, 1, 1, 1, 1]
                SoilCrop AGPRyegrassSoil: LL=[0.072, 0.056, 0.054, 0.049, 0.054, 0.062]; KL=[0.1, 0.085, 0.047, 0.01, 0.003, 0]; XF=[1, 1, 1, 1, 1, 1]
                SoilCrop RedCloverSoil: LL=[0.072, 0.056, 0.054, 0.049, 0.054, 0.062]; KL=[0.085, 0.075, 0.033, 0.002, 0, 0]; XF=[1, 1, 1, 1, 1, 1]
              WaterBalance SoilWater: SummerDate=15-Sep; SummerU=6; SummerCona=3; WinterDate=15-Apr; WinterU=3; WinterCona=1; DiffusConst=88; DiffusSlope=35; Salb=0.2; CN2Bare=70; CNRed=20; CNCov=0.8; DischargeWidth=0; CatchmentArea=0; PSIDul=-100
                Thickness  SWCON  KLAT
                200        0.391  0
                250        0.304  0
                250        0.437  0
                300        0.291  0
                250        0.334  0
                250        0.343  0
              SoilNitrogen: fom_types=[default, manure, mucuna, lablab, shemp, stable]; fract_carb=[0.2, 0.3, 0.54, 0.57, 0.45, 0]; fract_cell=[0.7, 0.3, 0.37, 0.37, 0.47, 0.1]; fract_lign=[0.1, 0.4, 0.09, 0.06, 0.08, 0.9]; NPartitionApproach=0
              Organic: FOMCNRatio=40; CarbonUnits=Total
                Thickness  Carbon  SoilCNRatio  FBiom  FInert  FOM
                200        1.89    11.9         0.065  0.1     1000
                250        0.99    11.9         0.02   0.275   750
                250        0.45    11.9         0.015  0.65    310
                300        0.12    11.9         0.01   0.8     160
                250        0.06    11.9         0.007  0.95    25
                250        0.06    11.9         0.005  0.99    5
              CERESSoilTemperature Temperature
              Water: Thickness=[200, 250, 250, 300, 250, 250]; InitialValues=[0.299, 0.268, 0.182, 0.2, 0.219, 0.219]; InitialPAWmm=256.2; RelativeTo=LL15; FilledFromTop=false
              SoilNitrogenNO3 NO3: Thickness=[200, 250, 250, 300, 250, 250]; InitialValues=[5.10204, 1.94444, 0.536769, 0.536769, 0.331492, 0.331492]; InitialValuesUnits=ppm; WaterTableConcentration=0; D0=0; DepthConstant=0; MaxDepthSoluteAccessible=0; RunoffEffectivenessAtMovingSolute=0; MaxEffectiveRunoff=0
              SoilNitrogenNH4 NH4: Thickness=[200, 250, 250, 300, 250, 250]; InitialValuesUnits=ppm; WaterTableConcentration=0; D0=0; DepthConstant=0; MaxDepthSoluteAccessible=0; RunoffEffectivenessAtMovingSolute=0; MaxEffectiveRunoff=0
                InitialValues=[0.340136, 0.138889, 0.0536769, 0.0536769, 0.0276243, 0.0276243]
              SoilNitrogenUrea Urea: Thickness=[200, 250, 250, 300, 250, 250]; InitialValues=[0, 0, 0, 0, 0, 0]; InitialValuesUnits=kg/ha; WaterTableConcentration=0; D0=0; DepthConstant=0; MaxDepthSoluteAccessible=0; RunoffEffectivenessAtMovingSolute=0; MaxEffectiveRunoff=0
            Plant RedClover
            PastureSpecies AGPRyegrass: doyGermination=275; daysEmergenceToAnthesis=120; daysAnthesisToMaturity=85; degreesDayForAnthesis=1100; degreesDayForMaturity=900; daysAnnualsFactor=45; InitialShootDM=1500; InitialRootDM=450; InitialRootDepth=750; initialDMFractionsGrasses=[0.15, 0.25, 0.25, 0.05, 0.05, 0.1, 0.1, 0.05, 0, 0, 0]; initialDMFractionsForbs=[0.2, 0.2, 0.15, 0.05, 0.1, 0.15, 0.1, 0.05, 0, 0, 0]; PhotosyntheticEfficiency=0.01; PhotosynthesisCurveFactor=0.8; FractionPAR=0.5; ReferenceCO2=380; CO2EffectScaleFactor=700; CO2EffectOffsetFactor=600; CO2EffectMinimum=0.7; CO2EffectExponent=2; ReproSeasonDurationCoeff=2; ReproSeasonShouldersLengthFactor=1; ReproSeasonOnsetDurationFactor=0.6; RelativeTurnoverEmerging=2; DetachmentDroughtCoefficient=3; DetachmentDroughtEffectMin=0.1; TurnoverStockFactor=0.01; TurnoverDefoliationEffectMin=0.025; MinimumGreenLeafProp=0.8; MinimumGreenRootProp=0.5
              initialDMFractionsLegumes=[0.16, 0.23, 0.22, 0.05, 0.03, 0.05, 0.05, 0.01, 0.04, 0.08, 0.08]
              LinearInterpolationFunction FVPDFunction
            Report: EventNames=[Clock].DoReport
              VariableNames:
                [Clock].Today as Date
                [Clock].Today.DayOfYear as DayOfYear
                [Weather].Radn as SolarRadiation
                [MicroClimate].NetRadiation
                ([RedClover].Leaf.RadiationIntercepted+[AGPRyegrass].InterceptedRadn) as InterceptedRadiation
                [Weather].MeanT
                [Weather].Rain as Rainfall
                [Irrigation].IrrigationApplied as IrrigationApplied
                [MicroClimate].PrecipitationInterception as PrecipitationInterception
                [MicroClimate].PetTotal
                [Soil].SoilWater.Eo as Eo
                [Soil].SoilWater.Es as Evaporation
                ([RedClover].Leaf.Transpiration+sum([AGPRyegrass].WaterUptake)) as Transpiration
                [Soil].SoilWater.pond as PondedWater
                [Soil].SoilWater.Drainage as Drainage
                [Soil].SoilWater.Runoff as Runoff
                sum([Soil].SoilWater.LateralOutflow) as LateralFlow
                sum([Soil].Water.MM) as TotalSWC
                sum([Soil].Physical.DULmm) as TotalDUL
                sum([Soil].Physical.LL15mm) as TotalLL15
                [Soil].Water.Volumetric[1] as SWCTopLayer
                [Soil].Physical.DUL[1] as DULTopLayer
                [Fertiliser].NitrogenApplied as FertiliserN
                sum([Soil].SoilNitrogen.Denitrification) as DenitrifiedN
                ([Soil].SoilWater.LeachNH4 + [Soil].SoilWater.LeachNO3) as LeachedN
                (([RedClover].Root.NTakenUp)*10+[AGPRyegrass].SoilUptakeN) as UptakeN
                sum([Soil].SoilNitrogen.MineralisedN) as MineralisedSoilN
                sum([Soil].SoilNitrogen.dlt_n_min_res) as MineralisedSurfOMN
                ([RedClover].Leaf.Detached.N+[RedClover].Petiole.Detached.N+[RedClover].Stem.Detached.N+[RedClover].Inflorescence.Detached.N+[AGPRyegrass].LitterDepositionN*0.1) as DetachedAGN
                ([RedClover].Root.Detached.N+[AGPRyegrass].RootDetachedN*0.1) as DetachedBGN
                (10*([RedClover].Leaf.Detached.N+[RedClover].Petiole.Detached.N+[RedClover].Stem.Detached.N+[RedClover].Inflorescence.Detached.N+[RedClover].Taproot.Detached.N+[RedClover].Root.Detached.N)+[AGPRyegrass].LitterDepositionN+[AGPRyegrass].RootDetachedN) as DetachedTotalN
                10*[RedClover].Nodule.NFixed as FixedN
                (sum([Soil].Urea.kgha) + sum([Soil].NH4.kgha) + sum([Soil].NO3.kgha)) as SoilNContent
                sum([Soil].Urea.kgha) as SoilUrea
                sum([Soil].NH4.kgha) as SoilNH4
                sum([Soil].NO3.kgha) as SoilNO3
                (sum([Soil].NH4.kgha[1:4])+sum([Soil].NO3.kgha[1:4])) as TopSoilN
                [SurfaceOrganicMatter].N as TotalSurfOMN
                sum([Soil].SoilNitrogen.FOMN) as TotalFOMN
                sum([Soil].SoilNitrogen.HumicN) as TotalHumicN
                sum([Soil].SoilNitrogen.MicrobialN as TotalMicrobialN
                [DefoliationManager].Script.RotationHarvestedDM as RotationHarvestedWt
                [DefoliationManager].Script.PreHarvestDM
                [DefoliationManager].Script.PostHarvestDM
                [DefoliationManager].Script.DefoliatedN as NTakenOff
                [DefoliationManager].Script.HarvestedN
                (10*[DefoliationManager].Script.RemovedN) as Defoliate.Script.RemovedN
                [DefoliationManager].Script.DefoliatedWt as HarvestedWt
                ([DefoliationManager].Script.RemovedN/([DefoliationManager].Script.RemovedWt+0.000001) as RemovedNConc
                [ExtraVariables].Script.AccumHarvestedWt as CumulativeHarvestedWt
                [ExtraVariables].Script.AccumHarvestedN as CumulativeNTakenOff
                ([RedClover].Total.Wt+[AGPRyegrass].TotalWt*0.1) as TotalPlantWt
                ([RedClover].AboveGroundLive.Wt+[AGPRyegrass].AboveGroundLiveWt*0.1+[RedClover].BelowGround.Wt+[AGPRyegrass].BelowGroundWt*0.1) as TotalPlantLiveWt
                ([RedClover].AboveGround.Wt+[AGPRyegrass].AboveGroundWt*0.1) as AboveGroundWt
                ([RedClover].BelowGround.Wt+[AGPRyegrass].BelowGroundWt*0.1) as BelowGroundWt
                ([RedClover].Total.N+[AGPRyegrass].TotalN*0.1) as TotalPlantN
                ([RedClover].AboveGround.N+[AGPRyegrass].AboveGroundN*0.1) as AboveGroundN
                ([RedClover].BelowGround.N+[AGPRyegrass].BelowGroundN*0.1) as BelowGroundN
                (([RedClover].AboveGround.N+[AGPRyegrass].AboveGroundN*0.1)/([RedClover].AboveGround.Wt+[AGPRyegrass].AboveGroundWt*0.1+0.000001)) as AboveGroundNConc
                (([RedClover].BelowGround.N+[AGPRyegrass].BelowGroundN*0.1)/([RedClover].BelowGround.Wt+[AGPRyegrass].BelowGroundWt*0.1+0.000001)) as BelowGroundNConc
                ([RedClover].AboveGroundLive.Wt+[AGPRyegrass].AboveGroundLiveWt*0.1) as AboveGroundLiveWt
                ([RedClover].AboveGroundLive.N+[AGPRyegrass].AboveGroundLiveN*0.1) as AboveGroundDeadWt
                ([RedClover].BelowGround.Wt+[AGPRyegrass].BelowGroundWt*0.1) as BelowGroundLiveWt
                (([RedClover].AboveGroundLive.N+[AGPRyegrass].AboveGroundLiveN*0.1)/([RedClover].AboveGroundLive.Wt+[AGPRyegrass].AboveGroundLiveWt*0.1+0.000001)) as AboveGroundLiveNc
                [ExtraVariables].Script.HerbageNConc as HerbageNConc
                ([AGPRyegrass].TotalWt*0.1) as Ryegrass.Total.Wt
                ([AGPRyegrass].AboveGroundLiveWt*0.1+[AGPRyegrass].BelowGroundWt*0.1) as Ryegrass.TotalLive.Wt
                ([AGPRyegrass].AboveGroundWt*0.1) as Ryegrass.AboveGround.Wt
                ([AGPRyegrass].BelowGroundWt*0.1) as Ryegrass.BelowGround.Wt
                ([AGPRyegrass].AboveGroundLiveWt*0.1) as Ryegrass.AboveGroundLive.Wt
                ([AGPRyegrass].AboveGroundDeadWt*0.1) as Ryegrass.AboveGroundDead.Wt
                ([AGPRyegrass].BelowGroundWt*0.1) as Ryegrass.BelowGroundLive.Wt
                ([AGPRyegrass].TotalN*0.1) as Ryegrass.Total.N
                ([AGPRyegrass].AboveGroundN*0.1) as Ryegrass.AboveGround.N
                ([AGPRyegrass].BelowGroundN*0.1) as Ryegrass.BelowGround.N
                [AGPRyegrass].AboveGroundNConc as Ryegrass.AboveGround.NConc
                ([AGPRyegrass].BelowGroundN/([AGPRyegrass].BelowGroundWt+0.000001)) as Ryegrass.BelowGround.NConc
                ([AGPRyegrass].AboveGroundLiveN/([AGPRyegrass].AboveGroundLiveWt+0.000001)) as Ryegrass.AboveGroundLive.NConc
                [AGPRyegrass].Standing.NConc as RyegrassHerbageNConc
                [RedClover].Total.Wt
                [RedClover].TotalLive.Wt
                [RedClover].AboveGround.Wt
                [RedClover].BelowGround.Wt
                [RedClover].AboveGroundLive.Wt
                [RedClover].AboveGroundDead.Wt
                [RedClover].BelowGroundLive.Wt
                [RedClover].Total.N
                [RedClover].AboveGround.N
                [RedClover].BelowGround.N
                [RedClover].AboveGround.NConc
                [RedClover].BelowGround.NConc
                [RedClover].AboveGroundLive.NConc
                (([RedClover].Leaf.N+[RedClover].Petiole.N+[RedClover].Inflorescence.N)/(([RedClover].Leaf.Wt+[RedClover].Petiole.Wt+[RedClover].Inflorescence.Wt+0.000001)) as RedCloverHerbageNConc
                ([RedClover].AboveGround.Wt/([RedClover].AboveGround.Wt+[AGPRyegrass].AboveGroundWt*0.1+0.000001)) as RedClover.BiomassFraction
                ([AGPRyegrass].AboveGroundWt*0.1/([RedClover].AboveGround.Wt+[AGPRyegrass].AboveGroundWt*0.1+0.000001)) as Ryegrass.BiomassFraction
                ([RedClover].AboveGround.N/([RedClover].AboveGround.N+[AGPRyegrass].AboveGroundN*0.1+0.000001)) as RedClover.NitrogenFraction
                ([AGPRyegrass].AboveGroundN*0.1/([RedClover].AboveGround.N+[AGPRyegrass].AboveGroundN*0.1+0.000001)) as Ryegrass.NitrogenFraction
                ([RedClover].Leaf.CoverTotal+[AGPRyegrass].CoverTotal) as CoverTotal
                ([RedClover].Leaf.CoverDead+[AGPRyegrass].CoverDead) as CoverDead
                [MicroClimate].CanopyCover
                ([RedClover].Leaf.LAI+[AGPRyegrass].LAIGreen) as LAIgreen
                ([RedClover].Leaf.LAIDead+[AGPRyegrass].LAIDead) as LAIdead
                (([RedClover].Leaf.Height+[AGPRyegrass].Height)/2) as AverageShootHeight
                (([RedClover].Root.Depth+[AGPRyegrass].RootDepth)/2) as AverageRootDepth
                ([RedClover].Root.LengthDensity+[AGPRyegrass].Root.LengthDensity) as Total.RootLengthDensity
                [RedClover].Leaf.CoverTotal as RedClover.CoverTotal
                [AGPRyegrass].CoverTotal as Ryegrass.CoverTotal
                (0*[AGPRyegrass].TotalWt) as Ryegrass.Population
                [RedClover].Population
                [RedClover].Leaf.Height as RedClover.Height
                [AGPRyegrass].Height as Ryegrass.Height
                [RedClover].Root.Depth
                [AGPRyegrass].RootDepth as Ryegrass.Root.Depth
                [RedClover].Root.LengthDensity
                [AGPRyegrass].Root.LengthDensity as Ryegrass.Root.LengthDensity
                [RedClover].Leaf.LAI as RedClover.LAI
                [AGPRyegrass].LAI as Ryegrass.LAI
                [RedClover].Leaf.RadiationIntercepted as RedClover.RadiationIntercepted
                [AGPRyegrass].InterceptedRadn as Ryegrass.RadiationIntercepted
                [RedClover].Phenology.Stage
                [AGPRyegrass].Stage as Ryegrass.Phenology.Stage
                [RedClover].ShootRootRatio
                ([RedClover].AboveGroundLive.Wt/([RedClover].TotalLive.Wt+0.000001)) as RedClover.CurrentAboveGroundFraction
                ([AGPRyegrass].AboveGroundLiveWt/([AGPRyegrass].BelowGroundWt+0.000001)) as Ryegrass.ShootRootRatio
                ([AGPRyegrass].AboveGroundLiveWt/([AGPRyegrass].AboveGroundLiveWt+[AGPRyegrass].BelowGroundWt+0.000001)) as Ryegrass.CurrentAboveGroundFraction
                [AGPRyegrass].GlfNSupply
                [AGPRyegrass].GlfWaterSupply
                [AGPRyegrass].GlfWaterLogging
                [AGPRyegrass].GlfNContent
                [AGPRyegrass].GlfCO2
                [AGPRyegrass].GlfTemperature
                [AGPRyegrass].GlfColdDamage
                [AGPRyegrass].GlfHeatDamage
                [RedClover].Leaf.Fw
                [RedClover].Leaf.Fn
                [RedClover].Leaf.FNmetabolic
                [RedClover].Leaf.Photosynthesis.FCO2
                [RedClover].Leaf.Photosynthesis.FN
                [RedClover].Leaf.Photosynthesis.FT
                [RedClover].Leaf.Photosynthesis.FW
                [RedClover].Leaf.Photosynthesis.FVPD
                [RedClover].Leaf.FRGR
      Experiment FoulumMix2
        Memo: same as Evaluation.Denmark.FoulumMix1.Memo
        Factors
          Permutation
            Factor NInputs: same as Evaluation.Denmark.FoulumMix1.Factors.Permutation.NInputs
            Factor SpeciesMix: Specification=[Sowing]
              Operations LessChicory
                2013-05-06  [Chicory].Sow(population: 100, cultivar: "Puna", depth: 10, rowSpacing: 150)
                2013-05-06  [RedClover].Sow(population: 150, cultivar: "Rajah", depth: 5, rowSpacing: 150)
                2013-01-01  [AGPRyegrass].EndCrop()
                2013-05-31  [AGPRyegrass].Sow(population: 0, cultivar: "R", depth: 0, rowSpacing: 0)
              Operations MoreChicory
                2013-05-06  [Chicory].Sow(population: 300, cultivar: "Puna", depth: 10, rowSpacing: 150)
                2013-05-06  [RedClover].Sow(population: 75, cultivar: "Rajah", depth: 5, rowSpacing: 150)
                2013-01-01  [AGPRyegrass].EndCrop()
                2013-06-05  [AGPRyegrass].Sow(population: 0, cultivar: "R", depth: 0, rowSpacing: 0)
        Simulation FoulumMix2
          Clock: Start=2013-01-01; End=2015-12-31
          Weather: FileName=Foulum.met
          Summary summaryfile
          SoilArbitrator Soil Arbitrator
          Forages
            Parameters:
              Name                          IsLive  DigestibilityString  FractionConsumable  MinimumAmount  UseDigestibilityFromModel
              SurfaceOrganicMatter.Residue  true    0.7                  1                   100            false
              SurfaceOrganicMatter.Residue  false   0.3                  1                   0              false
              Chicory.Leaf                  true    0.7                  1                   100            false
              Chicory.Leaf                  false   0.3                  1                   0              false
              Chicory.Stem                  true    0.7                  1                   100            false
              Chicory.Stem                  false   0.3                  1                   0              false
              Chicory.Inflorescence         true    0.7                  1                   100            false
              Chicory.Inflorescence         false   0.3                  1                   0              false
              Chicory.Taproot               true    0.7                  1                   100            false
              Chicory.Taproot               false   0.3                  1                   0              false
              Chicory.Root                  true    0                    0                   0              false
              Chicory.Root                  false   0                    0                   0              false
              AGPRyegrass.Leaf              true    0.7                  1                   100            false
              AGPRyegrass.Leaf              false   0.3                  1                   0              false
              AGPRyegrass.Stem              true    0.7                  1                   100            false
              AGPRyegrass.Stem              false   0.3                  1                   0              false
              AGPRyegrass.Stolon            true    0.7                  1                   100            false
              AGPRyegrass.Stolon            false   0.3                  1                   0              false
              RedClover.Leaf                true    0.7                  1                   100            false
              RedClover.Leaf                false   0.3                  1                   0              false
              RedClover.Petiole             true    0.7                  1                   100            false
              RedClover.Petiole             false   0.3                  1                   0              false
              RedClover.Stem                true    0.7                  1                   100            false
              RedClover.Stem                false   0.3                  1                   0              false
              RedClover.Inflorescence       true    0.7                  1                   100            false
              RedClover.Inflorescence       false   0.3                  1                   0              false
              RedClover.Nodule              true    0.7                  1                   100            false
              RedClover.Nodule              false   0.3                  1                   0              false
              RedClover.Taproot             true    0.7                  1                   100            false
              RedClover.Taproot             false   0.3                  1                   0              false
              RedClover.Root                true    0                    0                   0              false
              RedClover.Root                false   0                    0                   0              false
          Zone Field: Area=1; Slope=0; AspectAngle=0; Altitude=50
            Folder Management
              Operations Sowing
              Operations BaseNApplication: same as Evaluation.Denmark.FoulumMix1.FoulumMix1.Field.Management.BaseNApplication
              Operations FertiliserSchedule
              Operations IrrigationSchedulle: same as Evaluation.Denmark.FoulumMix1.FoulumMix1.Field.Management.IrrigationSchedulle
              Manager DefoliationManager: same as Evaluation.NewZealand.FRNLRuakuraMix2.FRNLRuakuraMix2.Field.Management.DefoliationManager
              Operations DefoliationSchedule: same as Evaluation.Denmark.FoulumMix1.FoulumMix1.Field.Management.DefoliationSchedule
              Manager ExtraVariables
                script: same as in Evaluation.NewZealand.FRNLRuakuraMix1.FRNLRuakuraMix1.Field.Management.ExtraVariables
              Manager SettingUpParams
                setParamStartDate = 01/01/2013 00:00:00
                setParamHeight = 250
```csharp
// Set some plant parameters, for tests and development
// Following suggestions by Val Snow: Plant competition seem to be better done if heights are all the same (maybe due to some issue/feature of MicroClimate)

using APSIM.Shared.Utilities;
using System.Xml.Serialization;
using Models.PMF;
using Models.Soils;
using Models;
using System.Text;
using System.Collections.Generic;
using Models.Core;
using System;

namespace Models
{
    [Serializable]
    public class Script : Model
    {
        [Link] Clock Clock;
        [Link] Zone myZone;


        //User inputs from properties tab
        [Separator("Setting up some parameters of plants")]
        [Description(" Enter the date to set plant parameters (dd/mm/yyyy):")]
        public DateTime setParamStartDate { get; set; }
        [Description(" Enter the height to set all plants to (mm):")]
        public double setParamHeight { get; set; }


        //Internal variables


        [EventSubscribe("StartOfSimulation")]
        private void OnSimulationCommencing(object sender, EventArgs e)
        {
            // make sure that manager will work when startDate<simulationStartDay
            if (Clock.Today > setParamStartDate)
                setParamStartDate = Clock.Today;
        }

        [EventSubscribe("StartOfDay")]
        private void OnStartOfDay(object sender, EventArgs e)
        {
            // make sure that rotation start when startDate<simulationStartDay
            if (Clock.Today == setParamStartDate)
            {
                double[] xVals = new double[] {0, 10};
                double[] yVals = new double[] {setParamHeight, setParamHeight};
                myZone.Set("Chicory.Leaf.HeightFunction.XYPairs.X", xVals);
                myZone.Set("Chicory.Leaf.HeightFunction.XYPairs.Y", yVals);
                myZone.Set("RedClover.Leaf.HeightFunction.XYPairs.X", xVals);
                myZone.Set("RedClover.Leaf.HeightFunction.XYPairs.Y", yVals);
                /*myZone.Set("Ryegrass.PlantHeightMaximum", setParamHeight);
                myZone.Set("Ryegrass.PlantHeightMinimum", setParamHeight);*/
            }
        }
    }
}
```
            MicroClimate: a_interception=0; b_interception=1; c_interception=0; d_interception=0; SoilHeatFluxFraction=0.4; MinimumHeightDiffForNewLayer=0; NightInterceptionFraction=0.5; ReferenceHeight=2
            Irrigation
            Fertiliser
            SurfaceOrganicMatter: InitialResidueName=grass; InitialResidueType=grass; InitialResidueMass=1000; InitialStandingFraction=0; InitialCPR=0; InitialCNR=40
            Soil: same as Evaluation.Denmark.FoulumMix1.FoulumMix1.Field.Soil
            Plant Chicory
            PastureSpecies AGPRyegrass: same as Evaluation.Denmark.FoulumMix1.FoulumMix1.Field.AGPRyegrass
            Plant RedClover
            Report: EventNames=[Clock].DoReport
              VariableNames:
                [Clock].Today as Date
                [Clock].Today.DayOfYear as DayOfYear
                [Weather].Radn as SolarRadiation
                [MicroClimate].NetRadiation
                ([Chicory].Leaf.RadiationIntercepted+[RedClover].Leaf.RadiationIntercepted+[AGPRyegrass].InterceptedRadn) as InterceptedRadiation
                [Weather].MeanT
                [Weather].Rain as Rainfall
                [Irrigation].IrrigationApplied as IrrigationApplied
                [MicroClimate].PrecipitationInterception as PrecipitationInterception
                [MicroClimate].PetTotal
                [Soil].SoilWater.Eo as Eo
                [Soil].SoilWater.Es as Evaporation
                ([Chicory].Leaf.Transpiration+[RedClover].Leaf.Transpiration+sum([AGPRyegrass].WaterUptake)) as Transpiration
                [Soil].SoilWater.pond as PondedWater
                [Soil].SoilWater.Drainage as Drainage
                [Soil].SoilWater.Runoff as Runoff
                sum([Soil].SoilWater.LateralOutflow) as LateralFlow
                sum([Soil].Water.MM) as TotalSWC
                sum([Soil].Physical.DULmm) as TotalDUL
                sum([Soil].Physical.LL15mm) as TotalLL15
                [Soil].Water.Volumetric[1] as SWCTopLayer
                [Soil].Physical.DUL[1] as DULTopLayer
                [Fertiliser].NitrogenApplied as FertiliserN
                sum([Soil].SoilNitrogen.Denitrification) as DenitrifiedN
                ([Soil].SoilWater.LeachNH4 + [Soil].SoilWater.LeachNO3) as LeachedN
                (([Chicory].Root.NTakenUp++[RedClover].Root.NTakenUp)*10+[AGPRyegrass].SoilUptakeN) as UptakeN
                sum([Soil].SoilNitrogen.MineralisedN) as MineralisedSoilN
                sum([Soil].SoilNitrogen.dlt_n_min_res) as MineralisedSurfOMN
                ([Chicory].Leaf.Detached.N+[Chicory].Stem.Detached.N+[Chicory].Inflorescence.Detached.N+[RedClover].Leaf.Detached.N+[RedClover].Petiole.Detached.N+[RedClover].Stem.Detached.N+[RedClover].Inflorescence.Detached.N+[AGPRyegrass].LitterDepositionN*0.1) as DetachedAGN
                ([Chicory].Taproot.Detached.N+[Chicory].Root.Detached.N+[RedClover].Root.Detached.N+[AGPRyegrass].RootDetachedN*0.1) as DetachedBGN
                (10*([Chicory].Leaf.Detached.N+[Chicory].Stem.Detached.N+[Chicory].Inflorescence.Detached.N+[RedClover].Leaf.Detached.N+[RedClover].Petiole.Detached.N+[RedClover].Stem.Detached.N+[RedClover].Inflorescence.Detached.N+[Chicory].Taproot.Detached.N+[Chicory].Root.Detached.N+[RedClover].Taproot.Detached.N+[RedClover].Root.Detached.N)+[AGPRyegrass].LitterDepositionN+[AGPRyegrass].RootDetachedN) as DetachedTotalN
                10*[RedClover].Nodule.NFixed as FixedN
                (sum([Soil].Urea.kgha) + sum([Soil].NH4.kgha) + sum([Soil].NO3.kgha)) as SoilNContent
                sum([Soil].Urea.kgha) as SoilUrea
                sum([Soil].NH4.kgha) as SoilNH4
                sum([Soil].NO3.kgha) as SoilNO3
                (sum([Soil].NH4.kgha[1:4])+sum([Soil].NO3.kgha[1:4])) as TopSoilN
                [SurfaceOrganicMatter].N as TotalSurfOMN
                sum([Soil].SoilNitrogen.FOMN) as TotalFOMN
                sum([Soil].SoilNitrogen.HumicN) as TotalHumicN
                sum([Soil].SoilNitrogen.MicrobialN as TotalMicrobialN
                [DefoliationManager].Script.RotationHarvestedDM as RotationHarvestedWt
                [DefoliationManager].Script.PreHarvestDM
                [DefoliationManager].Script.PostHarvestDM
                [DefoliationManager].Script.DefoliatedN as NTakenOff
                [DefoliationManager].Script.HarvestedN
                (10*[DefoliationManager].Script.RemovedN) as Defoliate.Script.RemovedN
                [DefoliationManager].Script.DefoliatedWt as HarvestedWt
                ([DefoliationManager].Script.RemovedN/([DefoliationManager].Script.RemovedWt+0.000001) as RemovedNConc
                [ExtraVariables].Script.AccumHarvestedWt as CumulativeHarvestedWt
                [ExtraVariables].Script.AccumHarvestedN as CumulativeNTakenOff
                ([Chicory].Total.Wt+[RedClover].Total.Wt+[AGPRyegrass].TotalWt*0.1) as TotalPlantWt
                ([Chicory].AboveGroundLive.Wt+[RedClover].AboveGroundLive.Wt+[AGPRyegrass].AboveGroundLiveWt*0.1+[Chicory].BelowGround.Wt+[RedClover].BelowGround.Wt+[AGPRyegrass].BelowGroundWt*0.1) as TotalPlantLiveWt
                ([Chicory].AboveGround.Wt+[RedClover].AboveGround.Wt+[AGPRyegrass].AboveGroundWt*0.1) as AboveGroundWt
                ([Chicory].BelowGround.Wt+[RedClover].BelowGround.Wt+[AGPRyegrass].BelowGroundWt*0.1) as BelowGroundWt
                ([Chicory].Total.N+[RedClover].Total.N+[AGPRyegrass].TotalN*0.1) as TotalPlantN
                ([Chicory].AboveGround.N++[RedClover].AboveGround.N+[AGPRyegrass].AboveGroundN*0.1) as AboveGroundN
                ([Chicory].BelowGround.N+[RedClover].BelowGround.N+[AGPRyegrass].BelowGroundN*0.1) as BelowGroundN
                (([Chicory].AboveGround.N+[RedClover].AboveGround.N+[AGPRyegrass].AboveGroundN*0.1)/([Chicory].AboveGround.Wt+[RedClover].AboveGround.Wt+[AGPRyegrass].AboveGroundWt*0.1+0.000001)) as AboveGroundNConc
                (([Chicory].BelowGround.N+[RedClover].BelowGround.N+[AGPRyegrass].BelowGroundN*0.1)/([Chicory].BelowGround.Wt+[RedClover].BelowGround.Wt+[AGPRyegrass].BelowGroundWt*0.1+0.000001)) as BelowGroundNConc
                ([Chicory].AboveGroundLive.Wt+[RedClover].AboveGroundLive.Wt+[AGPRyegrass].AboveGroundLiveWt*0.1) as AboveGroundLiveWt
                ([Chicory].AboveGroundLive.N+[RedClover].AboveGroundLive.N+[AGPRyegrass].AboveGroundLiveN*0.1) as AboveGroundDeadWt
                ([Chicory].BelowGround.Wt+[RedClover].BelowGround.Wt+[AGPRyegrass].BelowGroundWt*0.1) as BelowGroundLiveWt
                (([Chicory].AboveGroundLive.N+[RedClover].AboveGroundLive.N+[AGPRyegrass].AboveGroundLiveN*0.1)/([Chicory].AboveGroundLive.Wt+[RedClover].AboveGroundLive.Wt+[AGPRyegrass].AboveGroundLiveWt*0.1+0.000001)) as AboveGroundLiveNc
                [ExtraVariables].Script.HerbageNConc as HerbageNConc
                [Chicory].Total.Wt
                ([Chicory].AboveGroundLive.Wt+[Chicory].BelowGroundLive.Wt) as Chicory.TotalLive.Wt
                [Chicory].AboveGround.Wt
                [Chicory].BelowGround.Wt
                [Chicory].AboveGroundLive.Wt
                ([Chicory].AboveGround.Wt-[Chicory].AboveGroundLive.Wt) as Chicory.AboveGroundDead.Wt
                [Chicory].BelowGroundLive.Wt
                [Chicory].Total.N
                [Chicory].AboveGround.N
                [Chicory].BelowGround.N
                [Chicory].AboveGround.NConc
                [Chicory].BelowGround.NConc
                [Chicory].AboveGroundLive.NConc
                (([Chicory].Leaf.N+[Chicory].Stem.N+[Chicory].Inflorescence.N)/(([Chicory].Leaf.Wt+[Chicory].Stem.Wt+[Chicory].Inflorescence.Wt+0.000001)) as ChicoryHerbageNConc
                ([AGPRyegrass].TotalWt*0.1) as Ryegrass.Total.Wt
                ([AGPRyegrass].AboveGroundLiveWt*0.1+[AGPRyegrass].BelowGroundWt*0.1) as Ryegrass.TotalLive.Wt
                ([AGPRyegrass].AboveGroundWt*0.1) as Ryegrass.AboveGround.Wt
                ([AGPRyegrass].BelowGroundWt*0.1) as Ryegrass.BelowGround.Wt
                ([AGPRyegrass].AboveGroundLiveWt*0.1) as Ryegrass.AboveGroundLive.Wt
                ([AGPRyegrass].AboveGroundDeadWt*0.1) as Ryegrass.AboveGroundDead.Wt
                ([AGPRyegrass].BelowGroundWt*0.1) as Ryegrass.BelowGroundLive.Wt
                ([AGPRyegrass].TotalN*0.1) as Ryegrass.Total.N
                ([AGPRyegrass].AboveGroundN*0.1) as Ryegrass.AboveGround.N
                ([AGPRyegrass].BelowGroundN*0.1) as Ryegrass.BelowGround.N
                [AGPRyegrass].AboveGroundNConc as Ryegrass.AboveGround.NConc
                ([AGPRyegrass].BelowGroundN/([AGPRyegrass].BelowGroundWt+0.000001)) as Ryegrass.BelowGround.NConc
                ([AGPRyegrass].AboveGroundLiveN/([AGPRyegrass].AboveGroundLiveWt+0.000001)) as Ryegrass.AboveGroundLive.NConc
                [AGPRyegrass].Standing.NConc as RyegrassHerbageNConc
                [RedClover].Total.Wt
                [RedClover].TotalLive.Wt
                [RedClover].AboveGround.Wt
                [RedClover].BelowGround.Wt
                [RedClover].AboveGroundLive.Wt
                [RedClover].AboveGroundDead.Wt
                [RedClover].BelowGroundLive.Wt
                [RedClover].Total.N
                [RedClover].AboveGround.N
                [RedClover].BelowGround.N
                [RedClover].AboveGround.NConc
                [RedClover].BelowGround.NConc
                [RedClover].AboveGroundLive.NConc
                (([RedClover].Leaf.N+[RedClover].Petiole.N+[RedClover].Inflorescence.N)/(([RedClover].Leaf.Wt+[RedClover].Petiole.Wt+[RedClover].Inflorescence.Wt+0.000001)) as RedCloverHerbageNConc
                ([Chicory].AboveGround.Wt/([Chicory].AboveGround.Wt+[RedClover].AboveGround.Wt+[AGPRyegrass].AboveGroundWt*0.1+0.000001)) as Chicory.BiomassFraction
                ([RedClover].AboveGround.Wt/([Chicory].AboveGround.Wt+[RedClover].AboveGround.Wt+[AGPRyegrass].AboveGroundWt*0.1+0.000001)) as RedClover.BiomassFraction
                ([AGPRyegrass].AboveGroundWt*0.1/([Chicory].AboveGround.Wt+[RedClover].AboveGround.Wt+[AGPRyegrass].AboveGroundWt*0.1+0.000001)) as Ryegrass.BiomassFraction
                ([Chicory].AboveGround.N/([Chicory].AboveGround.N+[RedClover].AboveGround.N+[AGPRyegrass].AboveGroundN*0.1+0.000001)) as Chicory.NitrogenFraction
                ([RedClover].AboveGround.N/([Chicory].AboveGround.N+[RedClover].AboveGround.N+[AGPRyegrass].AboveGroundN*0.1+0.000001)) as RedClover.NitrogenFraction
                ([AGPRyegrass].AboveGroundN*0.1/([Chicory].AboveGround.N+[RedClover].AboveGround.N+[AGPRyegrass].AboveGroundN*0.1+0.000001)) as Ryegrass.NitrogenFraction
                ([Chicory].Leaf.CoverTotal+[RedClover].Leaf.CoverTotal+[AGPRyegrass].CoverTotal) as CoverTotal
                ([Chicory].Leaf.CoverDead+[RedClover].Leaf.CoverDead+[AGPRyegrass].CoverDead) as CoverDead
                [MicroClimate].CanopyCover
                ([Chicory].Leaf.LAI+[RedClover].Leaf.LAI+[AGPRyegrass].LAIGreen) as LAIgreen
                ([Chicory].Leaf.LAIDead+[RedClover].Leaf.LAIDead+[AGPRyegrass].LAIDead) as LAIdead
                (([Chicory].Leaf.Height+[RedClover].Leaf.Height+[AGPRyegrass].Height)/3) as AverageShootHeight
                (([Chicory].Root.Depth+[RedClover].Root.Depth+[AGPRyegrass].RootDepth)/3) as AverageRootDepth
                ([Chicory].Root.LengthDensity+[RedClover].Root.LengthDensity+[AGPRyegrass].Root.LengthDensity) as Total.RootLengthDensity
                [Chicory].Leaf.CoverTotal as Chicory.CoverTotal
                [RedClover].Leaf.CoverTotal as RedClover.CoverTotal
                [AGPRyegrass].CoverTotal as Ryegrass.CoverTotal
                [Chicory].Population
                (0*[AGPRyegrass].TotalWt) as Ryegrass.Population
                [RedClover].Population
                [Chicory].Leaf.Height as Chicory.Height
                [RedClover].Leaf.Height as RedClover.Height
                [AGPRyegrass].Height as Ryegrass.Height
                [Chicory].Root.Depth
                [RedClover].Root.Depth
                [AGPRyegrass].RootDepth as Ryegrass.Root.Depth
                [Chicory].Root.LengthDensity
                [RedClover].Root.LengthDensity
                [AGPRyegrass].Root.LengthDensity as Ryegrass.Root.LengthDensity
                [Chicory].Leaf.LAI as Chicory.LAI
                [RedClover].Leaf.LAI as RedClover.LAI
                [AGPRyegrass].LAI as Ryegrass.LAI
                [Chicory].Leaf.RadiationIntercepted as Chicory.RadiationIntercepted
                [RedClover].Leaf.RadiationIntercepted as RedClover.RadiationIntercepted
                [AGPRyegrass].InterceptedRadn as Ryegrass.RadiationIntercepted
                [Chicory].Phenology.Stage
                [RedClover].Phenology.Stage
                [AGPRyegrass].Stage as Ryegrass.Phenology.Stage
                [Chicory].ShootRootRatio
                ([Chicory].AboveGroundLive.Wt/([Chicory].AboveGroundLive.Wt+[Chicory].BelowGround.Wt+0.000001)) as Chicory.CurrentAboveGroundFraction
                [RedClover].ShootRootRatio
                ([RedClover].AboveGroundLive.Wt/([RedClover].TotalLive.Wt+0.000001)) as RedClover.CurrentAboveGroundFraction
                ([AGPRyegrass].AboveGroundLiveWt/([AGPRyegrass].BelowGroundWt+0.000001)) as Ryegrass.ShootRootRatio
                ([AGPRyegrass].AboveGroundLiveWt/([AGPRyegrass].AboveGroundLiveWt+[AGPRyegrass].BelowGroundWt+0.000001)) as Ryegrass.CurrentAboveGroundFraction
                [Chicory].Leaf.Fw
                [Chicory].Leaf.Fn
                [Chicory].Leaf.FNmetabolic
                [Chicory].Leaf.Photosynthesis.FCO2
                [Chicory].Leaf.Photosynthesis.FN
                [Chicory].Leaf.Photosynthesis.FT
                [Chicory].Leaf.Photosynthesis.FW
                [Chicory].Leaf.Photosynthesis.FVPD
                [Chicory].Leaf.FRGR
                [AGPRyegrass].GlfNSupply
                [AGPRyegrass].GlfWaterSupply
                [AGPRyegrass].GlfWaterLogging
                [AGPRyegrass].GlfNContent
                [AGPRyegrass].GlfCO2
                [AGPRyegrass].GlfTemperature
                [AGPRyegrass].GlfColdDamage
                [AGPRyegrass].GlfHeatDamage
                [RedClover].Leaf.Fw
                [RedClover].Leaf.Fn
                [RedClover].Leaf.FNmetabolic
                [RedClover].Leaf.Photosynthesis.FCO2
                [RedClover].Leaf.Photosynthesis.FN
                [RedClover].Leaf.Photosynthesis.FT
                [RedClover].Leaf.Photosynthesis.FW
                [RedClover].Leaf.Photosynthesis.FVPD
                [RedClover].Leaf.FRGR
      Experiment FoulumMix3
        Memo
          ###Foulum species competition###

          This simulation setup was based on field trials performed at the the Foulumgaard Experimental Station, Aarhus University, Denmark, between 2013 and 2015.  The trial was part of an experiment studying species competition in multi-species sward in a dairy organic farming context.  This comprises the stablishement of plots sown with various species in monoculture and in a few combinations, either varying the number and type of species or the relative sowing rate.  The plots received either no N fertiliser or a nominal annual rate of 250 kgN/ha applied as cattle slurry.  Details of the site and trial can be found in publications ([CongEtAl2017]; [CongAndEriksen2018]; and [CongEtAl2018]).  Here only a selection of plots with mixed pasture species are used, these involved ryegrass, red clover, chicory and ribwort plantain (weeds also occured, but are not included in the simulation - the fraction of biomass was fairly small).  In these plots ryegrass and red clover were sown in equal proportion with either chicory or plantain; the proportion of forbs was set to either 20% or 60% of the sown population (thus ryerass and clover populations were, respectively, at 40% or 20% each).  Each treatment combining sowing rate and N inputs had three replicates.  Measurements comprised total yield and respective values for each species.
          Observed data supplied by Wen Feng Cong and Jorgen Eriksen, Aarhus University.

          The soil at the experimental site was a loamy sand (a Typic Hapludult on the USDA classification), the parameters required were derived from data published and slighlty adjusted with measurements done at the experimental site ([JacobsenFoulum1989]; [HeidmannFoulum1989]).
          Weather data was obtained from nearby weather station (Arhus University).
          Simulation of ryegrass is done using the AgPasture model as the PMF version is still under development.
        Factors
          Permutation
            Factor NInputs: same as Evaluation.Denmark.FoulumMix1.Factors.Permutation.NInputs
            Factor SpeciesMix: Specification=[Sowing]
              Operations LessPlantain
                2013-05-06  [PlantainForage].Sow(population: 100, cultivar: "Tonic", depth: 10, rowSpacing: 150)
                2013-05-06  [RedClover].Sow(population: 150, cultivar: "Rajah", depth: 5, rowSpacing: 150)
                2013-01-01  [AGPRyegrass].EndCrop()
                2013-05-31  [AGPRyegrass].Sow(population: 0, cultivar: "R", depth: 0, rowSpacing: 0)
              Operations MorePlantain
                2013-05-06  [PlantainForage].Sow(population: 300, cultivar: "Tonic", depth: 10, rowSpacing: 150)
                2013-05-06  [RedClover].Sow(population: 75, cultivar: "Rajah", depth: 5, rowSpacing: 150)
                2013-01-01  [AGPRyegrass].EndCrop()
                2013-06-05  [AGPRyegrass].Sow(population: 0, cultivar: "R", depth: 0, rowSpacing: 0)
        Simulation FoulumMix3
          Clock: Start=2013-01-01; End=2015-12-31
          Weather: FileName=Foulum.met
          Summary summaryfile
          SoilArbitrator Soil Arbitrator
          Forages
            Parameters:
              Name                          IsLive  DigestibilityString  FractionConsumable  MinimumAmount  UseDigestibilityFromModel
              SurfaceOrganicMatter.Residue  true    0.7                  1                   100            false
              SurfaceOrganicMatter.Residue  false   0.3                  1                   0              false
              PlantainForage.Leaf           true    0.7                  1                   100            false
              PlantainForage.Leaf           false   0.3                  1                   0              false
              PlantainForage.Stem           true    0.7                  1                   100            false
              PlantainForage.Stem           false   0.3                  1                   0              false
              PlantainForage.Inflorescence  true    0.7                  1                   100            false
              PlantainForage.Inflorescence  false   0.3                  1                   0              false
              PlantainForage.Taproot        true    0.7                  1                   100            false
              PlantainForage.Taproot        false   0.3                  1                   0              false
              PlantainForage.Root           true    0                    0                   0              false
              PlantainForage.Root           false   0                    0                   0              false
              AGPRyegrass.Leaf              true    0.7                  1                   100            false
              AGPRyegrass.Leaf              false   0.3                  1                   0              false
              AGPRyegrass.Stem              true    0.7                  1                   100            false
              AGPRyegrass.Stem              false   0.3                  1                   0              false
              AGPRyegrass.Stolon            true    0.7                  1                   100            false
              AGPRyegrass.Stolon            false   0.3                  1                   0              false
              RedClover.Leaf                true    0.7                  1                   100            false
              RedClover.Leaf                false   0.3                  1                   0              false
              RedClover.Petiole             true    0.7                  1                   100            false
              RedClover.Petiole             false   0.3                  1                   0              false
              RedClover.Stem                true    0.7                  1                   100            false
              RedClover.Stem                false   0.3                  1                   0              false
              RedClover.Inflorescence       true    0.7                  1                   100            false
              RedClover.Inflorescence       false   0.3                  1                   0              false
              RedClover.Nodule              true    0.7                  1                   100            false
              RedClover.Nodule              false   0.3                  1                   0              false
              RedClover.Taproot             true    0.7                  1                   100            false
              RedClover.Taproot             false   0.3                  1                   0              false
              RedClover.Root                true    0                    0                   0              false
              RedClover.Root                false   0                    0                   0              false
          Zone Field: Area=1; Slope=0; AspectAngle=0; Altitude=50
            Folder Management
              Operations Sowing
              Operations BaseNApplication: same as Evaluation.Denmark.FoulumMix1.FoulumMix1.Field.Management.BaseNApplication
              Operations FertiliserSchedule
              Operations IrrigationSchedulle: same as Evaluation.Denmark.FoulumMix1.FoulumMix1.Field.Management.IrrigationSchedulle
              Manager DefoliationManager: same as Evaluation.NewZealand.FRNLRuakuraMix2.FRNLRuakuraMix2.Field.Management.DefoliationManager
              Operations DefoliationSchedule: same as Evaluation.Denmark.FoulumMix1.FoulumMix1.Field.Management.DefoliationSchedule
              Manager ExtraVariables
                script: same as in Evaluation.NewZealand.FRNLRuakuraMix1.FRNLRuakuraMix1.Field.Management.ExtraVariables
              Manager SettingUpParams
                setParamStartDate = 01/01/2013 00:00:00
                setParamHeight = 250
```csharp
// Set some plant parameters, for tests and development
// Following suggestions by Val Snow: Plant competition seem to be better done if heights are all the same (maybe due to some issue/feature of MicroClimate)

using APSIM.Shared.Utilities;
using System.Xml.Serialization;
using Models.PMF;
using Models.Soils;
using Models;
using System.Text;
using System.Collections.Generic;
using Models.Core;
using System;

namespace Models
{
    [Serializable]
    public class Script : Model
    {
        [Link] Clock Clock;
        [Link] Zone myZone;


        //User inputs from properties tab
        [Separator("Setting up some parameters of plants")]
        [Description(" Enter the date to set plant parameters (dd/mm/yyyy):")]
        public DateTime setParamStartDate { get; set; }
        [Description(" Enter the height to set all plants to (mm):")]
        public double setParamHeight { get; set; }


        //Internal variables


        [EventSubscribe("StartOfSimulation")]
        private void OnSimulationCommencing(object sender, EventArgs e)
        {
            // make sure that manager will work when startDate<simulationStartDay
            if (Clock.Today > setParamStartDate)
                setParamStartDate = Clock.Today;
        }

        [EventSubscribe("StartOfDay")]
        private void OnStartOfDay(object sender, EventArgs e)
        {
            // make sure that rotation start when startDate<simulationStartDay
            if (Clock.Today == setParamStartDate)
            {
                double[] xVals = new double[] {0, 10};
                double[] yVals = new double[] {setParamHeight, setParamHeight};
                myZone.Set("PlantainForage.Leaf.HeightFunction.XYPairs.X", xVals);
                myZone.Set("PlantainForage.Leaf.HeightFunction.XYPairs.Y", yVals);
                myZone.Set("RedClover.Leaf.HeightFunction.XYPairs.X", xVals);
                myZone.Set("RedClover.Leaf.HeightFunction.XYPairs.Y", yVals);
                /*myZone.Set("Ryegrass.PlantHeightMaximum", setParamHeight);
                myZone.Set("Ryegrass.PlantHeightMinimum", setParamHeight);*/
            }
        }
    }
}
```
            MicroClimate: a_interception=0; b_interception=1; c_interception=0; d_interception=0; SoilHeatFluxFraction=0.4; MinimumHeightDiffForNewLayer=0; NightInterceptionFraction=0.5; ReferenceHeight=2
            Irrigation
            Fertiliser
            SurfaceOrganicMatter: InitialResidueName=grass; InitialResidueType=grass; InitialResidueMass=1000; InitialStandingFraction=0; InitialCPR=0; InitialCNR=40
            Soil: same as Evaluation.Denmark.FoulumMix1.FoulumMix1.Field.Soil
            Plant PlantainForage
            PastureSpecies AGPRyegrass: same as Evaluation.Denmark.FoulumMix1.FoulumMix1.Field.AGPRyegrass
            Plant RedClover
            Report: EventNames=[Clock].DoReport
              VariableNames:
                [Clock].Today as Date
                [Clock].Today.DayOfYear as DayOfYear
                [Weather].Radn as SolarRadiation
                [MicroClimate].NetRadiation
                ([PlantainForage].Leaf.RadiationIntercepted+[RedClover].Leaf.RadiationIntercepted+[AGPRyegrass].InterceptedRadn) as InterceptedRadiation
                [Weather].MeanT
                [Weather].Rain as Rainfall
                [Irrigation].IrrigationApplied as IrrigationApplied
                [MicroClimate].PrecipitationInterception as PrecipitationInterception
                [MicroClimate].PetTotal
                [Soil].SoilWater.Eo as Eo
                [Soil].SoilWater.Es as Evaporation
                ([PlantainForage].Leaf.Transpiration+[RedClover].Leaf.Transpiration+sum([AGPRyegrass].WaterUptake)) as Transpiration
                [Soil].SoilWater.pond as PondedWater
                [Soil].SoilWater.Drainage as Drainage
                [Soil].SoilWater.Runoff as Runoff
                sum([Soil].SoilWater.LateralOutflow) as LateralFlow
                sum([Soil].Water.MM) as TotalSWC
                sum([Soil].Physical.DULmm) as TotalDUL
                sum([Soil].Physical.LL15mm) as TotalLL15
                [Soil].Water.Volumetric[1] as SWCTopLayer
                [Soil].Physical.DUL[1] as DULTopLayer
                [Fertiliser].NitrogenApplied as FertiliserN
                sum([Soil].SoilNitrogen.Denitrification) as DenitrifiedN
                ([Soil].SoilWater.LeachNH4 + [Soil].SoilWater.LeachNO3) as LeachedN
                (([PlantainForage].Root.NTakenUp+[RedClover].Root.NTakenUp)*10+[AGPRyegrass].SoilUptakeN) as UptakeN
                sum([Soil].SoilNitrogen.MineralisedN) as MineralisedSoilN
                sum([Soil].SoilNitrogen.dlt_n_min_res) as MineralisedSurfOMN
                ([PlantainForage].Leaf.Detached.N+[PlantainForage].Stem.Detached.N+[PlantainForage].Inflorescence.Detached.N+[RedClover].Leaf.Detached.N+[RedClover].Petiole.Detached.N+[RedClover].Stem.Detached.N+[RedClover].Inflorescence.Detached.N+[AGPRyegrass].LitterDepositionN*0.1) as DetachedAGN
                ([PlantainForage].Taproot.Detached.N+[PlantainForage].Root.Detached.N+[RedClover].Taproot.Detached.N+[RedClover].Root.Detached.N+[AGPRyegrass].RootDetachedN*0.1) as DetachedBGN
                (10*([PlantainForage].Leaf.Detached.N+[PlantainForage].Stem.Detached.N+[PlantainForage].Inflorescence.Detached.N+[RedClover].Leaf.Detached.N+[RedClover].Petiole.Detached.N+[RedClover].Stem.Detached.N+[RedClover].Inflorescence.Detached.N+[PlantainForage].Taproot.Detached.N+[PlantainForage].Root.Detached.N+[RedClover].Taproot.Detached.N+[RedClover].Root.Detached.N)+[AGPRyegrass].LitterDepositionN+[AGPRyegrass].RootDetachedN) as DetachedTotalN
                10*[RedClover].Nodule.NFixed as FixedN
                (sum([Soil].Urea.kgha) + sum([Soil].NH4.kgha) + sum([Soil].NO3.kgha)) as SoilNContent
                sum([Soil].Urea.kgha) as SoilUrea
                sum([Soil].NH4.kgha) as SoilNH4
                sum([Soil].NO3.kgha) as SoilNO3
                (sum([Soil].NH4.kgha[1:4])+sum([Soil].NO3.kgha[1:4])) as TopSoilN
                [SurfaceOrganicMatter].N as TotalSurfOMN
                sum([Soil].SoilNitrogen.FOMN) as TotalFOMN
                sum([Soil].SoilNitrogen.HumicN) as TotalHumicN
                sum([Soil].SoilNitrogen.MicrobialN as TotalMicrobialN
                [DefoliationManager].Script.RotationHarvestedDM as RotationHarvestedWt
                [DefoliationManager].Script.PreHarvestDM
                [DefoliationManager].Script.PostHarvestDM
                [DefoliationManager].Script.DefoliatedN as NTakenOff
                [DefoliationManager].Script.HarvestedN
                (10*[DefoliationManager].Script.RemovedN) as Defoliate.Script.RemovedN
                [DefoliationManager].Script.DefoliatedWt as HarvestedWt
                ([DefoliationManager].Script.RemovedN/([DefoliationManager].Script.RemovedWt+0.000001) as RemovedNConc
                [ExtraVariables].Script.AccumHarvestedWt as CumulativeHarvestedWt
                [ExtraVariables].Script.AccumHarvestedN as CumulativeNTakenOff
                ([PlantainForage].Total.Wt+[RedClover].Total.Wt+[AGPRyegrass].TotalWt*0.1) as TotalPlantWt
                ([PlantainForage].AboveGroundLive.Wt+[RedClover].AboveGroundLive.Wt+[AGPRyegrass].AboveGroundLiveWt*0.1+[PlantainForage].BelowGround.Wt+[RedClover].BelowGround.Wt+[AGPRyegrass].BelowGroundWt*0.1) as TotalPlantLiveWt
                ([PlantainForage].AboveGround.Wt+[RedClover].AboveGround.Wt+[AGPRyegrass].AboveGroundWt*0.1) as AboveGroundWt
                ([PlantainForage].BelowGround.Wt+[RedClover].BelowGround.Wt+[AGPRyegrass].BelowGroundWt*0.1) as BelowGroundWt
                ([PlantainForage].Total.N+[RedClover].Total.N+[AGPRyegrass].TotalN*0.1) as TotalPlantN
                ([PlantainForage].AboveGround.N+[RedClover].AboveGround.N+[AGPRyegrass].AboveGroundN*0.1) as AboveGroundN
                ([PlantainForage].BelowGround.N+[RedClover].BelowGround.N+[AGPRyegrass].BelowGroundN*0.1) as BelowGroundN
                (([PlantainForage].AboveGround.N+[RedClover].AboveGround.N+[AGPRyegrass].AboveGroundN*0.1)/([PlantainForage].AboveGround.Wt+[RedClover].AboveGround.Wt+[AGPRyegrass].AboveGroundWt*0.1+0.000001)) as AboveGroundNConc
                (([PlantainForage].BelowGround.N+[RedClover].BelowGround.N+[AGPRyegrass].BelowGroundN*0.1)/([PlantainForage].BelowGround.Wt+[RedClover].BelowGround.Wt+[AGPRyegrass].BelowGroundWt*0.1+0.000001)) as BelowGroundNConc
                ([PlantainForage].AboveGroundLive.Wt+[RedClover].AboveGroundLive.Wt+[AGPRyegrass].AboveGroundLiveWt*0.1) as AboveGroundLiveWt
                ([PlantainForage].AboveGroundLive.N+[RedClover].AboveGroundLive.N+[AGPRyegrass].AboveGroundLiveN*0.1) as AboveGroundDeadWt
                ([PlantainForage].BelowGround.Wt+[RedClover].BelowGround.Wt+[AGPRyegrass].BelowGroundWt*0.1) as BelowGroundLiveWt
                (([PlantainForage].AboveGroundLive.N+[RedClover].AboveGroundLive.N+[AGPRyegrass].AboveGroundLiveN*0.1)/([PlantainForage].AboveGroundLive.Wt+[RedClover].AboveGroundLive.Wt+[AGPRyegrass].AboveGroundLiveWt*0.1+0.000001)) as AboveGroundLiveNc
                [ExtraVariables].Script.HerbageNConc as HerbageNConc
                [PlantainForage].Total.Wt
                ([PlantainForage].AboveGroundLive.Wt+[PlantainForage].BelowGroundLive.Wt) as Plantain.TotalLive.Wt
                [PlantainForage].AboveGround.Wt
                [PlantainForage].BelowGround.Wt
                [PlantainForage].AboveGroundLive.Wt
                ([PlantainForage].AboveGround.Wt-[PlantainForage].AboveGroundLive.Wt) as Plantain.AboveGroundDead.Wt
                [PlantainForage].BelowGroundLive.Wt
                [PlantainForage].Total.N
                [PlantainForage].AboveGround.N
                [PlantainForage].BelowGround.N
                [PlantainForage].AboveGround.NConc
                [PlantainForage].BelowGround.NConc
                [PlantainForage].AboveGroundLive.NConc
                (([PlantainForage].Leaf.N+[PlantainForage].Stem.N+[PlantainForage].Inflorescence.N)/(([PlantainForage].Leaf.Wt+[PlantainForage].Stem.Wt+[PlantainForage].Inflorescence.Wt+0.000001)) as PlantainHerbageNConc
                ([AGPRyegrass].TotalWt*0.1) as Ryegrass.Total.Wt
                ([AGPRyegrass].AboveGroundLiveWt*0.1+[AGPRyegrass].BelowGroundWt*0.1) as Ryegrass.TotalLive.Wt
                ([AGPRyegrass].AboveGroundWt*0.1) as Ryegrass.AboveGround.Wt
                ([AGPRyegrass].BelowGroundWt*0.1) as Ryegrass.BelowGround.Wt
                ([AGPRyegrass].AboveGroundLiveWt*0.1) as Ryegrass.AboveGroundLive.Wt
                ([AGPRyegrass].AboveGroundDeadWt*0.1) as Ryegrass.AboveGroundDead.Wt
                ([AGPRyegrass].BelowGroundWt*0.1) as Ryegrass.BelowGroundLive.Wt
                ([AGPRyegrass].TotalN*0.1) as Ryegrass.Total.N
                ([AGPRyegrass].AboveGroundN*0.1) as Ryegrass.AboveGround.N
                ([AGPRyegrass].BelowGroundN*0.1) as Ryegrass.BelowGround.N
                [AGPRyegrass].AboveGroundNConc as Ryegrass.AboveGround.NConc
                ([AGPRyegrass].BelowGroundN/([AGPRyegrass].BelowGroundWt+0.000001)) as Ryegrass.BelowGround.NConc
                ([AGPRyegrass].AboveGroundLiveN/([AGPRyegrass].AboveGroundLiveWt+0.000001)) as Ryegrass.AboveGroundLive.NConc
                [AGPRyegrass].Standing.NConc as RyegrassHerbageNConc
                [RedClover].Total.Wt
                [RedClover].TotalLive.Wt
                [RedClover].AboveGround.Wt
                [RedClover].BelowGround.Wt
                [RedClover].AboveGroundLive.Wt
                [RedClover].AboveGroundDead.Wt
                [RedClover].BelowGroundLive.Wt
                [RedClover].Total.N
                [RedClover].AboveGround.N
                [RedClover].BelowGround.N
                [RedClover].AboveGround.NConc
                [RedClover].BelowGround.NConc
                [RedClover].AboveGroundLive.NConc
                (([RedClover].Leaf.N+[RedClover].Petiole.N+[RedClover].Inflorescence.N)/(([RedClover].Leaf.Wt+[RedClover].Petiole.Wt+[RedClover].Inflorescence.Wt+0.000001)) as RedCloverHerbageNConc
                ([PlantainForage].AboveGround.Wt/([PlantainForage].AboveGround.Wt+[RedClover].AboveGround.Wt+[AGPRyegrass].AboveGroundWt*0.1+0.000001)) as Plantain.BiomassFraction
                ([RedClover].AboveGround.Wt/([PlantainForage].AboveGround.Wt+[RedClover].AboveGround.Wt+[AGPRyegrass].AboveGroundWt*0.1+0.000001)) as RedClover.BiomassFraction
                ([AGPRyegrass].AboveGroundWt*0.1/([PlantainForage].AboveGround.Wt+[RedClover].AboveGround.Wt+[AGPRyegrass].AboveGroundWt*0.1+0.000001)) as Ryegrass.BiomassFraction
                ([PlantainForage].AboveGround.N/([PlantainForage].AboveGround.N+[RedClover].AboveGround.N+[AGPRyegrass].AboveGroundN*0.1+0.000001)) as Plantain.NitrogenFraction
                ([RedClover].AboveGround.N/([PlantainForage].AboveGround.N+[RedClover].AboveGround.N+[AGPRyegrass].AboveGroundN*0.1+0.000001)) as RedClover.NitrogenFraction
                ([AGPRyegrass].AboveGroundN*0.1/([PlantainForage].AboveGround.N+[RedClover].AboveGround.N+[AGPRyegrass].AboveGroundN*0.1+0.000001)) as Ryegrass.NitrogenFraction
                ([PlantainForage].Leaf.CoverTotal+[RedClover].Leaf.CoverTotal+[AGPRyegrass].CoverTotal) as CoverTotal
                ([PlantainForage].Leaf.CoverDead+[RedClover].Leaf.CoverDead+[AGPRyegrass].CoverDead) as CoverDead
                [MicroClimate].CanopyCover
                ([PlantainForage].Leaf.LAI+[RedClover].Leaf.LAI+[AGPRyegrass].LAIGreen) as LAIgreen
                ([PlantainForage].Leaf.LAIDead+[RedClover].Leaf.LAIDead+[AGPRyegrass].LAIDead) as LAIdead
                (([PlantainForage].Leaf.Height+[RedClover].Leaf.Height+[AGPRyegrass].Height)/3) as AverageShootHeight
                (([PlantainForage].Root.Depth+[RedClover].Root.Depth+[AGPRyegrass].RootDepth)/3) as AverageRootDepth
                ([PlantainForage].Root.LengthDensity+[RedClover].Root.LengthDensity+[AGPRyegrass].Root.LengthDensity) as Total.RootLengthDensity
                [PlantainForage].Leaf.CoverTotal as Plantain.CoverTotal
                [RedClover].Leaf.CoverTotal as RedClover.CoverTotal
                [AGPRyegrass].CoverTotal as Ryegrass.CoverTotal
                [PlantainForage].Population
                (0*[AGPRyegrass].TotalWt) as Ryegrass.Population
                [RedClover].Population
                [PlantainForage].Leaf.Height as Plantain.Height
                [RedClover].Leaf.Height as RedClover.Height
                [AGPRyegrass].Height as Ryegrass.Height
                [PlantainForage].Root.Depth
                [RedClover].Root.Depth
                [AGPRyegrass].RootDepth as Ryegrass.Root.Depth
                [PlantainForage].Root.LengthDensity
                [RedClover].Root.LengthDensity
                [AGPRyegrass].Root.LengthDensity as Ryegrass.Root.LengthDensity
                [PlantainForage].Leaf.LAI as Plantain.LAI
                [RedClover].Leaf.LAI as RedClover.LAI
                [AGPRyegrass].LAI as Ryegrass.LAI
                [PlantainForage].Leaf.RadiationIntercepted as Plantain.RadiationIntercepted
                [RedClover].Leaf.RadiationIntercepted as RedClover.RadiationIntercepted
                [AGPRyegrass].InterceptedRadn as Ryegrass.RadiationIntercepted
                [PlantainForage].Phenology.Stage
                [RedClover].Phenology.Stage
                [AGPRyegrass].Stage as Ryegrass.Phenology.Stage
                [PlantainForage].ShootRootRatio
                ([PlantainForage].AboveGroundLive.Wt/([PlantainForage].AboveGroundLive.Wt+[PlantainForage].BelowGround.Wt+0.000001)) as Plantain.CurrentAboveGroundFraction
                [RedClover].ShootRootRatio
                ([RedClover].AboveGroundLive.Wt/([RedClover].TotalLive.Wt+0.000001)) as RedClover.CurrentAboveGroundFraction
                ([AGPRyegrass].AboveGroundLiveWt/([AGPRyegrass].BelowGroundWt+0.000001)) as Ryegrass.ShootRootRatio
                ([AGPRyegrass].AboveGroundLiveWt/([AGPRyegrass].AboveGroundLiveWt+[AGPRyegrass].BelowGroundWt+0.000001)) as Ryegrass.CurrentAboveGroundFraction
                [PlantainForage].Leaf.Fw
                [PlantainForage].Leaf.Fn
                [PlantainForage].Leaf.FNmetabolic
                [PlantainForage].Leaf.Photosynthesis.FCO2
                [PlantainForage].Leaf.Photosynthesis.FN
                [PlantainForage].Leaf.Photosynthesis.FT
                [PlantainForage].Leaf.Photosynthesis.FW
                [PlantainForage].Leaf.Photosynthesis.FVPD
                [PlantainForage].Leaf.FRGR
                [AGPRyegrass].GlfNSupply
                [AGPRyegrass].GlfWaterSupply
                [AGPRyegrass].GlfWaterLogging
                [AGPRyegrass].GlfNContent
                [AGPRyegrass].GlfCO2
                [AGPRyegrass].GlfTemperature
                [AGPRyegrass].GlfColdDamage
                [AGPRyegrass].GlfHeatDamage
                [RedClover].Leaf.Fw
                [RedClover].Leaf.Fn
                [RedClover].Leaf.FNmetabolic
                [RedClover].Leaf.Photosynthesis.FCO2
                [RedClover].Leaf.Photosynthesis.FN
                [RedClover].Leaf.Photosynthesis.FT
                [RedClover].Leaf.Photosynthesis.FW
                [RedClover].Leaf.Photosynthesis.FVPD
                [RedClover].Leaf.FRGR
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