Simulations: Version=13
  DataStore
    ExcelInput Observed: FileName=Observed.xlsx; SheetNames=[ObservedWarraBlock1]
    PredictedObserved: PredictedTableName=Report; ObservedTableName=ObservedWarraBlock1; FieldNameUsedForMatch=Zone; FieldName2UsedForMatch=Clock.Today
      Tests: POName=PredictedObserved
        AcceptedStats:
          {Name=SW90cm, n=96, Slope=0.799144, Intercept=57.0369, SEslope=0.0486235, SEintercept=12.3554, R2=0.741843, RMSE=25.5948, NSE=0.716703, ME=6.92093, MAE=20.2468, RSR=0.529477}
        AcceptedStatsName=Name n Slope Intercept SEslope SEintercept R2 RMSE NSE ME MAE RSR
  Replacements
  Simulation MultiRootZone
    Memo
      This is a simple test that plants SLURP, changes its leaf area index and potential biomass production on one occasion and presents some graphs of Plant, N and Water balance components to show things are working.
    Clock: StartDate=1998-10-14; EndDate=1999-02-01
    ControlledEnvironment: MaxT=25; MinT=10; Rain=0; Radn=20; PanEvap=0; VP=0; Wind=3; CO2=350; AirPressure=1010; Latitude=0; DayLength=12
    Summary
    SoilArbitrator Soil Arbitrator
    Zone Zone1: Area=1; Slope=0
      Soil: Latitude=0; Longitude=0
        Analysis: Thickness=[100, 200, 300, 300, 300, 300]; PH=[6.6, 6.2, 5.7, 5.5, 5.5, 5.5]; PHUnits=Water; BoronUnits=HotWater
        InitialWater Initial water: PercentMethod=EvenlyDistributed; FractionFull=1
        Water
          Thickness  BD   AirDry  LL15  DUL   SAT
          100        1.2  0.08    0.13  0.33  0.5
          200        1.2  0.13    0.13  0.33  0.5
          300        1.2  0.1     0.1   0.31  0.44
          300        1.2  0.06    0.06  0.15  0.46
          300        1.2  0.04    0.04  0.1   0.44
          300        1.2  0.02    0.02  0.06  0.44
          SoilCrop SlurpSoil: LL=[0.13, 0.13, 0.1, 0.08, 0.11, 0.11]; KL=[0.06, 0.06, 0.06, 0.06, 0.06, 0.06]; XF=[1, 1, 1, 1, 1, 1]
          SoilCrop PotatoSoil: LL=[0.13, 0.13, 0.27, 0.27, 0.3, 0.3]; KL=[0.1, 0.06, 0.03, 0.01, 0, 0]; XF=[1, 1, 0.1, 0, 0, 0]
        SoilWater: SummerDate=1-Nov; WinterDate=1-Apr; Salb=0.18; CN2Bare=68; CNRed=20; CNCov=0.8
          zero: SummerU, SummerCona, WinterU, WinterCona, DiffusConst, DiffusSlope, slope, discharge_width, catchment_area, max_pond, residueinterception
          Thickness  SWCON  KLAT
          100        0.55   0
          200        0.55   0
          300        0.55   0
          300        0.55   0
          300        0.55   0
          300        0.55   0
        SoilNitrogen: fom_type=[default, manure, mucuna, lablab, shemp, stable]; fract_carb=[0.2, 0.3, 0.54, 0.57, 0.45, 0]; fract_cell=[0.7, 0.3, 0.37, 0.37, 0.47, 0.1]; fract_lign=[0.1, 0.4, 0.09, 0.06, 0.08, 0.9]
        SoilOrganicMatter: RootCN=30; RootWt=0; SoilCN=11.5; EnrACoeff=7.4; EnrBCoeff=0.2; OCUnits=Total
          Thickness  OC    FBiom  FInert
          100        1.82  0      1
          200        1.47  0      1
          300        1.2   0      1
          300        1.03  0      1
          300        0.47  0      1
          300        0.47  0      1
        Sample Initial nitrogen: NO3Units=kgha; NH4Units=ppm; SWUnits=Volumetric; OCUnits=Total; PHUnits=Water
          Thickness  NO3  NH4
          100        17   0
          200        30   0
          300        5    0
          300        5    0
          300        0    0
          300        0    0
        CERESSoilTemperature
      Plant Slurp: CropType=Slurp
        Memo TitlePage
          # SLURP: the Sound of a crop using water

          This model has been built using the Plant Modelling Framework (PMF) of [brown_plant_2014] to provide a simple representation of crops.  It is usefull for water and nitrogen balance studies where the focus is on soil processes and a very simple crop is adequate.  The model does not predict crop growth, development or yields.  It simply takes up water and nitrogen.   .

          SLURP has no phenology so the behaviour of the SLURP is the same throughout its ontology (with the exception of root depth being able to increase).  SLURP consists of 2 organs:
             1. Leaf which ls represented with a Simpleleaf class and provides a Water uptake demand to the soil arbitrator.
             2. Root which extracts water and nitrogen from the soil for plant growth

          ##Inclusion in APSIM simulations
          A Slurp crop is included in a simulation the same as any other APSIM crop
           * The Slurp object needs to be dragged or copied from the Crop folder in the tool box into the field of your simulation.
           * It is then planted with a sowing rule
          <pre><code class='language-cs'>
          Slurp.Sow(cultivar: StaticCrop, population: 1, depth: 10, rowSpacing: 150);
          </code></pre>
            * Note that SLURP has no notion of population or rowSpacing but these parameters are required by the Sow method so filler values are provided
            * depth in the Sow arguement is the depth that the crop is sown at.  While this has no effect on emergence in SLURP it sets the depth that the root system is initialised at.  For static crops this depth should be set to the rooting depth that is expected as roots will not grow during the simulation

          ##Altering Slurp properties during runs
          In some cases users will wish to change properties of Slurp while the simulation is running.  This can be done using a the set method in a manager script.

          <pre><code class='language-cs'>
          object LAIResetValue = leaflai;
          zone.Set("Slurp.Leaf.LAIFunction.FixedValue", LAIResetValue);
          object HeightResetValue = CoverToday * MaximumHeight;
          zone.Set("Slurp.Leaf.HeightFunction.FixedValue", HeightResetValue);
          </code></pre>
        OrganArbitrator Arbitrator
          RelativeAllocation NArbitrator
          RelativeAllocation DMArbitrator
        Root: GrowthRespiration=0; MaintenanceRespiration=0
          CompositeBiomass Live: Propertys=[[Root].LayerLive]
          CompositeBiomass Dead: Propertys=[[Root].LayerDead]
          MultiplyFunction RootFrontVelocity
            AirTemperatureFunction TemperatureEffect
              XYPairs: X=[0, 26, 35]; Y=[1, 1, 1]
            Constant Potential: FixedValue=5; Units=mm/d
          Constant MaxDailyNUptake: FixedValue=100; Units=g/m2
          Constant MaximumRootDepth: FixedValue=1000; Units=mm
          Constant NitrogenDemandSwitch: FixedValue=1; Units=0-1
          Constant MaximumNConc: FixedValue=0.01
          Constant MinimumNConc: FixedValue=0.01
          LinearInterpolationFunction KLModifier: XProperty=[Root].LayerMidPointDepth
            XYPairs: X=[0, 400, 1500]; Y=[1, 1, 0]
            Memo Description
              This is important in SLURP as it is set for each species to represent their differences in rooting patterns between crop species
          Constant InitialDM: FixedValue=50; Units=g/plant
          Constant SenescenceRate: FixedValue=0; Units=/d
          Constant SpecificRootLength: FixedValue=40; Units=m/g
          LinearInterpolationFunction KNO3: XProperty=[Root].LengthDensity
            XYPairs: X=[0, 0.003]; Y=[0.02, 0.02]
          LinearInterpolationFunction KNH4: XProperty=[Root].LengthDensity
            XYPairs: X=[0, 0.003]; Y=[0, 0]
          BiomassRemoval BiomassRemovalDefaults
            OrganBiomassRemovalType Harvest: FractionLiveToRemove=0; FractionDeadToRemove=0; FractionLiveToResidue=0; FractionDeadToResidue=0
            OrganBiomassRemovalType Cut: FractionLiveToRemove=0; FractionDeadToRemove=0; FractionLiveToResidue=0; FractionDeadToResidue=0
            OrganBiomassRemovalType Prune: FractionLiveToRemove=0; FractionDeadToRemove=0; FractionLiveToResidue=0; FractionDeadToResidue=0
            OrganBiomassRemovalType Graze: FractionLiveToRemove=0; FractionDeadToRemove=0; FractionLiveToResidue=0; FractionDeadToResidue=0
          LinearInterpolationFunction NUptakeSWFactor: XProperty=[Root].RWC
            XYPairs: X=[0, 1]; Y=[1, 1]
          PartitionFractionDemandFunction DMDemandFunction
            Constant PartitionFraction: FixedValue=0.2; Units=0-1
        SimpleLeaf Leaf: CohortsInitialised=false; Albedo=0.018; Gsmax=0.01; R50=200; MicroClimatePresent=true
          zero: TipsAtEmergence, CohortsAtInitialisation, InitialisedCohortNo, AppearedCohortNo, PlantAppearedLeafNo, LAI, Height, FRGR, PotentialEP, KDead, LAIDead
          Biomass Live
          Biomass Dead
          Constant DetachmentRateFunction: FixedValue=0; Units=/d
          MultiplyFunction InitialWtFunction
            Constant InitialPlantWt: FixedValue=0; Units=g/plant
            VariableReference Population: VariableName=[Plant].Population
          Constant LaiDeadFunction: FixedValue=0; Units=m^2/m^2
          Constant Photosynthesis: FixedValue=5; Units=g/m2/d
          AirTemperatureFunction FRGRFunction
            XYPairs: X=[0, 10, 25, 40]; Y=[0, 1, 1, 0]
          PartitionFractionDemandFunction DMDemandFunction
            Constant PartitionFraction: FixedValue=1; Units=0-1
          Constant MaximumNConc: FixedValue=0.05; Units=g/g
          Constant MinimumNConc: FixedValue=0.05; Units=g/g
          Constant LAIFunction: FixedValue=0.5; Units=m2/m2
          Constant ExtinctionCoefficientFunction: FixedValue=0.7
          Constant StructuralFraction: FixedValue=0.5; Units=0-1
          Constant HeightFunction: FixedValue=400; Units=mm
          Constant NReallocationFactor: FixedValue=0
          Constant SenescenceRate: FixedValue=0
          BiomassRemoval BiomassRemovalDefaults: same as MultiRootZone.Zone1.Slurp.Root.BiomassRemovalDefaults
          Constant MaintenanceRespirationFunction: FixedValue=0; Units=0-1
          Constant DMConversionEfficiency: FixedValue=1; Units=0-1
          Constant NRetranslocationFactor: FixedValue=0
          Constant NitrogenDemandSwitch: FixedValue=1
          Constant DMReallocationFactor: FixedValue=0
          Constant DMRetranslocationFactor: FixedValue=0
          VariableReference CriticalNConc: VariableName=[Leaf].MinimumNConc.Value()
        Cultivar StaticCrop
          Memo Description
            The static crop is the base crop and uses all the paramaters values specified above.
        Cultivar StaticTree
          Command:
            [Root].MaximumRootDepth.FixedValue = 2600
            [Leaf].ExtinctionCoefficientFunction.FixedValue = 0.65
            [Leaf].HeightFunction.FixedValue = 5000
            [Root].KLModifier.XYPairs.X = 0, 400, 500, 1000, 1500, 2000
            [Root].KLModifier.XYPairs.Y = 1, 1, 0.9, 0.6, 0.3, 0.1
          Memo Description
            The static tree is similar to the static crop but is taller, has a deeper root system and a lower extinction coefficient
        Cultivar Pasture
          Command:
            [Root].MaximumRootDepth.FixedValue = 800
            [Root].RootFrontVelocity.Potential.FixedValue = 15
            [Leaf].ExtinctionCoefficientFunction.FixedValue = 0.65
            [Root].KLModifier.XYPairs.X = 0, 200, 500, 1000
            [Root].KLModifier.XYPairs.Y = 1, 1, 0.7, 0.0
          Memo Description
            The pasture differs from the base crop because its has a RootFrontVelocity of 15 (as opposed to zero) which means the roots grow downward from sowing untill the MaximumRootDepth is reached.  It ExtinctionCoefficient and MaximumRootDepth are different to the base StaticCrop and it has a different pattern of kl with depth.
        Cultivar Lucerne
          Command:
            [Root].MaximumRootDepth.FixedValue = 2500
            [Root].RootFrontVelocity.Potential.FixedValue = 15
            [Leaf].ExtinctionCoefficientFunction.FixedValue = 0.8
            [Root].KLModifier.XYPairs.X = 0, 200, 500, 1000, 1500, 2000
            [Root].KLModifier.XYPairs.Y = 1, 1, 0.9, 0.6, 0.3, 0.1
          Memo Description
            Lucerne also grows root depth like pasture but has a greater root depth, different kl pattern and different extinction coefficient
      MicroClimate: a_interception=0; b_interception=1; c_interception=0; d_interception=0; soil_albedo=0.23; sun_angle=15; soil_heat_flux_fraction=0.4; night_interception_fraction=0.5; refheight=2; albedo=0.26; emissivity=0.96; RadIntTotal=0
      Irrigation
      Fertiliser
      Manager SlurpSowingRule
        CultivarName = StaticCrop
        InitialRootDepth = 200
        SowingDate = 1998-10-14
```csharp
using System;
using Models.Core;
using Models.PMF;
using APSIM.Shared.Utilities;
        
namespace Models
{
	[Serializable] 
	[System.Xml.Serialization.XmlInclude(typeof(Model))]
	public class Script : Model
	{
		[Link] Plant Slurp;
		[Link] Clock Clock;

		[Description("Cultivar")]
		public string CultivarName { get; set; }
		[Description("Initial Root Depth")]
		public double InitialRootDepth { get; set; }
		[Description("Sowing Date")]
		public DateTime SowingDate { get; set; }

               
		[EventSubscribe("DoManagement")]
		private void OnDoManagement(object sender, EventArgs e)
		{
			if (Clock.Today.Date == SowingDate)
				Slurp.Sow(cultivar: CultivarName, population: 1, depth: InitialRootDepth, rowSpacing: 150);
			//Potato.Sow(... Contains the following arguements:
			//Population  double  Optional  Seeds sowing/m2.  Default is zero
			//Cultivar    string  Required  "NameOfCultivar"
			//Depth       double  Optional  Depth (mm) seed sown.   Default is 100mm 
			//MaxCover    double  Optional  Proportion (0-1) of the ground row crop will cover.   Default is 1.0
			//BudNumber   double  Optional  Number of mainstems per seed sown.  Default is 1.0
			//RowSpacing  double  Optional  Spaceing (mm) between drill rows when crop is sown.  Default is 150mm
			//CropClass   string  Optional  Crop class to instantiate when crop is sown.  Default is "Plant"
		}
	}
}
```
      Manager ExtraVariables
```csharp
using System;
using Models.Core;
using System.Collections.Generic;
using System.Text;
using Models.Soils;
using Models.PMF;
using Models;
using System.Xml.Serialization;
using APSIM.Shared.Utilities;
using Models.Interfaces;

namespace Models
{
	[Serializable] 
	public class Script : Model
	{
		[Link] Clock Clock;
		[Link] Soils.Soil Soil;
		[Link] Models.SurfaceOM.SurfaceOrganicMatter SOM;
		[Link] IWeather Met;
		[Link] Fertiliser Fert;
		[Link] Irrigation Irrig;
		[Link] Plant Slurp;
		[Link] Zone zone;
					
		[XmlIgnore] public bool InitialDay { get; set; }
		
		[XmlIgnore] public double AccumPlantN { get; set; }
		[XmlIgnore] public double AccumMineralisation { get; set; }
		[XmlIgnore] public double AccumDenit { get; set; }
		[XmlIgnore] public double AccumFert { get; set; }
		[XmlIgnore] public double AccumLeach { get; set; }
		[XmlIgnore] public double AccumDetach { get; set; }
		[XmlIgnore] public double DeltaSoilOMN { get; set; }
		[XmlIgnore] public double DeltaSurfaceOMN { get; set; }
		[XmlIgnore] public double DeltaSoilMineralN { get; set; }
		[XmlIgnore] public double SoilNitrogenContent { get; set; }
		
		[XmlIgnore] public double AccumEO { get; set; }
		[XmlIgnore] public double AccumEP { get; set; }
		[XmlIgnore] public double AccumES { get; set; }
		[XmlIgnore] public double AccumDrainage { get; set; }
		[XmlIgnore] public double AccumRunoff { get; set; }
		[XmlIgnore] public double AccumOutflowLat { get; set; }
		[XmlIgnore] public double AccumIrrigation { get; set; }
		[XmlIgnore] public double AccumRainfall { get; set; }
		[XmlIgnore] public double SoilWaterDeficit { get; set; }
	
		[XmlIgnore] public double  InitialSoilOMN { get; set; }
		[XmlIgnore] public double  InitialSurfaceOMN { get; set; }
		[XmlIgnore] public double  InitialMineralN { get; set; }
		
		[XmlIgnore] public double SWC { get; set; }
		[XmlIgnore] public double DUL { get; set; }
		[XmlIgnore] public double OutFlowLat { get; set; }

		[XmlIgnore] public double FomN { get; set; }
		[XmlIgnore] public double BiomN { get; set; }
		[XmlIgnore] public double HumN { get; set; }
		[XmlIgnore] public double OrganicN { get; set; }
		[XmlIgnore] public double NO3N { get; set; }
		[XmlIgnore] public double NH4N { get; set; }
		[XmlIgnore] public double UreaN { get; set; }
		[XmlIgnore] public double MineralN { get; set; }
		[XmlIgnore] public double DltNMinRes { get; set; }
		[XmlIgnore] public double DltNMinTot { get; set; }
		
		[EventSubscribe("Commencing")]
		private void OnSimulationCommencing(object sender, EventArgs e)
		{
			InitialDay = true;
		}
		
		[EventSubscribe("DoManagement")]
		private void OnDoManagement(object sender, EventArgs e)
		{
			//!!!!!! Nitrogen balance components !!!!!!
			//!!!!!!^^^^^^^^^^^^^^^^^^^^^^^^^^^^^!!!!!!
			FomN = MathUtilities.Sum(Soil.SoilNitrogen.FOMN);
			HumN = MathUtilities.Sum(Soil.SoilNitrogen.HumicN);
			BiomN = MathUtilities.Sum(Soil.SoilNitrogen.MicrobialN);
			OrganicN = FomN + HumN + BiomN;
			NO3N = MathUtilities.Sum(Soil.NO3N);
			NH4N = MathUtilities.Sum(Soil.NH4N);
			UreaN = MathUtilities.Sum(Soil.SoilNitrogen.urea);
			MineralN = NO3N + NH4N + UreaN; 
			DltNMinRes = MathUtilities.Sum(Soil.SoilNitrogen.dlt_n_min_res);
			DltNMinTot = MathUtilities.Sum(Soil.SoilNitrogen.MineralisedN);
			int layers = Soil.Thickness.Length;
			if (InitialDay == true)
			{
				InitialSurfaceOMN = SOM.N;
				InitialSoilOMN = OrganicN;
				InitialMineralN = MineralN;
				InitialDay = false;
			}
			AccumFert += Fert.NitrogenApplied;
			DeltaSurfaceOMN = SOM.N - InitialSurfaceOMN;
			AccumLeach = AccumLeach - Soil.SoilWater.LeachNH4 - Soil.SoilWater.LeachNO3 - Soil.SoilWater.LeachUrea; //Fails
			AccumMineralisation += MathUtilities.Sum(Soil.SoilNitrogen.MineralisedN);
			AccumDenit -= MathUtilities.Sum(Soil.SoilNitrogen.Denitrification);
			AccumPlantN -= (double)zone.Get("Slurp.Root.NUptake");
			DeltaSoilOMN = OrganicN - InitialSoilOMN;
			DeltaSoilMineralN = MineralN - InitialMineralN;
			SoilNitrogenContent = MineralN;
			
			//!!!!!! Water balance components !!!!!!
			//!!!!!!^^^^^^^^^^^^^^^^^^^^^^^^^^!!!!!!

			AccumIrrigation += Irrig.IrrigationApplied;
			AccumRainfall += Met.Rain;
			//AccumEP -= (double)zone.Get("[Slurp].Leaf.Transpiration");
			AccumEP -= (double)zone.Get("Slurp.Root.WaterUptake");
			SoilWaterDeficit = (SWC - DUL);
			double OutFlowLat = MathUtilities.Sum(Soil.SoilWater.outflow_lat);
			AccumOutflowLat -= OutFlowLat;
		}
		
		[EventSubscribe("DoManagementCalculations")]
		private void OnDoManagementCalculations(object sender, EventArgs e)
		{
			FomN = MathUtilities.Sum(Soil.SoilNitrogen.FOMN);
			HumN = MathUtilities.Sum(Soil.SoilNitrogen.HumicN);
			BiomN = MathUtilities.Sum(Soil.SoilNitrogen.MicrobialN);
			
			
			AccumEO -= Soil.SoilWater.Eo;
			AccumES -= Soil.SoilWater.Es; 
			AccumDrainage -= Soil.SoilWater.Drainage;
			AccumRunoff -= Soil.SoilWater.Runoff;
			SWC = MathUtilities.Sum(Soil.SoilWater.SWmm);
			DUL = MathUtilities.Sum(Soil.SoilWater.DULmm);
		}
	}
}
```
      SurfaceOrganicMatter surface organic matter: PondActive=no; ReportAdditions=no; ReportRemovals=no; PoolName=wheat; type=wheat; mass=0; standing_fraction=0; cnr=80; CriticalResidueWeight=2000; OptimumDecompTemp=20; MaxCumulativeEOS=20; CNRatioDecompCoeff=0.277; CNRatioDecompThreshold=25; TotalLeachRain=25; MinRainToLeach=10; CriticalMinimumOrganicC=0.004; DefaultCPRatio=0; DefaultStandingFraction=0; StandingExtinctCoeff=0.5; FractionFaecesAdded=0.5
        Pools:
          {PoolName=wheat, ResidueType=wheat, Mass=0, CNRatio=80, StandingFraction=0}
        ResidueTypes: LoadFromResource=ResidueTypes
        TillageTypes TillageTypesList
      Operations
        1999-03-09  [Irrigation].Apply(0);
        1998-12-29  [Fertiliser].Apply(0, Fertiliser.Types.UreaN, 10);
      Report: EventNames=[Clock].DoReport
        VariableNames:
          [Clock].Today
          [ExtraVariables].Script.AccumPlantN
          [ExtraVariables].Script.AccumMineralisation
          [ExtraVariables].Script.AccumDenit
          [ExtraVariables].Script.AccumFert
          [ExtraVariables].Script.AccumLeach
          [ExtraVariables].Script.AccumDetach
          [ExtraVariables].Script.DeltaSoilOMN
          [ExtraVariables].Script.DeltaSurfaceOMN
          [ExtraVariables].Script.DeltaSoilMineralN
          [Slurp].Root.NSupply
          [Soil].SoilWater.Eo
          [Soil].SoilWater.Es
          [ExtraVariables].Script.SWC
          [ExtraVariables].Script.DUL
          [Soil].SoilWater.Drainage
          [Soil].SoilWater.Runoff
          [ExtraVariables].Script.OutFlowLat
          [Soil].SoilWater.pond
          [ExtraVariables].Script.AccumEO
          [ExtraVariables].Script.AccumEP
          [ExtraVariables].Script.AccumES
          [ExtraVariables].Script.AccumDrainage
          [ExtraVariables].Script.AccumRunoff
          [ExtraVariables].Script.AccumRainfall
          [ExtraVariables].Script.AccumIrrigation
          [ExtraVariables].Script.AccumOutflowLat
          [ExtraVariables].Script.SoilWaterDeficit
          [Slurp].Leaf.Live.Wt
          [Slurp].Root.Live.Wt
          [Slurp].Leaf.Live.N
          [Slurp].Root.Live.N
          [Slurp].Leaf.Live.NConc
          [Slurp].Root.Live.NConc
          [Slurp].Root.WaterSupply
          [Slurp].Root.WaterUptake
          [Slurp].Leaf.Transpiration
          [Slurp].Leaf.WaterDemand
          [Slurp].Root.Depth
          [Slurp].Root.Zones[1].Depth
          [Slurp].Root.Zones[2].Depth
          [Slurp].Root.Zones[3].Depth
          [Slurp].Leaf.CoverTotal
          [Slurp].Leaf.CoverDead
          [Slurp].Leaf.LAI
          [Slurp].Leaf.Height
          [Slurp].Leaf.PotentialBiomass.Value()
          [Soil].SoilWater.SWmm
          [Soil].NO3N
          [ExtraVariables].Script.SoilNitrogenContent
          [Slurp].Arbitrator.N.TotalPlantDemand
          [MicroClimate].net_radn
          [MicroClimate].peta
          [MicroClimate].petr
          [ExtraVariables].Script.FomN
          [ExtraVariables].Script.HumN
          [ExtraVariables].Script.BiomN
          [ExtraVariables].Script.DltNMinRes
          [ExtraVariables].Script.DltNMinTot
          [Slurp].Leaf.Fw
          [Slurp].Leaf.Fn
          [Weather].Rain
      Manager ResetProduction
        OverRidePath = Slurp.Leaf.Photosynthesis.FixedValue
        OverRideInterger = 2
        ChangeDate = 1998-11-14
```csharp
using System;
using Models.Core;
using System.Collections.Generic;
using System.Text;
using Models.PMF;
using Models;
using System.Xml.Serialization;
using APSIM.Shared.Utilities;

namespace Models
{
	[Serializable] 
	public class Script : Model
	{
		[Link] Plant Plant;
		[Link] Clock Clock;
		[Link] Zone zone;
		
		[Description("Path for coefficient to be Overwritten")]
		public string OverRidePath { get; set; }
		[Description("Value for new coefficient Interger")]
		public int OverRideInterger { get; set; }
		[Description("Sowing Date")]
		public DateTime ChangeDate { get; set; }
        
		[EventSubscribe("DoManagement")]
		private void OnDoManagement(object sender, EventArgs e)
		{
			if (Clock.Today.Date == ChangeDate)
			{
				object ResetValue = OverRideInterger;
				zone.Set(OverRidePath, ResetValue);
			}
		}
	}
}
```
      Manager ResetLAI
        OverRidePath = Slurp.Leaf.LAIFunction.FixedValue
        OverRideInterger = 3
        ChangeDate = 1999-01-01
        script: same as in MultiRootZone.Zone1.ResetProduction
      Manager SetupRootZones
```csharp
using System;
using Models.Core;
using System.Collections.Generic;
using System.Text;
using Models.PMF;
using Models;
using System.Xml.Serialization;
using APSIM.Shared.Utilities;

namespace Models
{
	[Serializable] 
	public class Script : Model
	{
		[Link] Plant Slurp;
		[Link] Clock Clock;
		[Link] Zone zone;
        
		[EventSubscribe("Commencing")]
		private void OnSimulationCommencing(object sender, EventArgs e)
		{
			Slurp.Root.ZoneNamesToGrowRootsIn.Add("Zone2");
			Slurp.Root.ZoneNamesToGrowRootsIn.Add("Zone3");
			Slurp.Root.ZoneRootDepths.Add(100);
			Slurp.Root.ZoneRootDepths.Add(50);
			Slurp.Root.ZoneInitialDM.Add(2000);
			Slurp.Root.ZoneInitialDM.Add(1000);
		}
	}
}
```
      SoluteManager
    Zone Zone2: Area=1; Slope=0
      Soil: same as MultiRootZone.Zone1.Soil
      SurfaceOrganicMatter surface organic matter: same as MultiRootZone.Zone1.surface organic matter
      Report: EventNames=[Clock].DoReport
        VariableNames:
          [Clock].Today
          [ExtraVariables].Script.AccumPlantN
          [ExtraVariables].Script.AccumMineralisation
          [ExtraVariables].Script.AccumDenit
          [ExtraVariables].Script.AccumFert
          [ExtraVariables].Script.AccumLeach
          [ExtraVariables].Script.AccumDetach
          [ExtraVariables].Script.DeltaSoilOMN
          [ExtraVariables].Script.DeltaSurfaceOMN
          [ExtraVariables].Script.DeltaSoilMineralN
          [Slurp].Root.NSupply
          [Soil].SoilWater.Eo
          [Soil].SoilWater.Es
          [ExtraVariables].Script.SWC
          [ExtraVariables].Script.DUL
          [Soil].SoilWater.Drainage
          [Soil].SoilWater.Runoff
          [ExtraVariables].Script.OutFlowLat
          [Soil].SoilWater.pond
          [ExtraVariables].Script.AccumEO
          [ExtraVariables].Script.AccumEP
          [ExtraVariables].Script.AccumES
          [ExtraVariables].Script.AccumDrainage
          [ExtraVariables].Script.AccumRunoff
          [ExtraVariables].Script.AccumRainfall
          [ExtraVariables].Script.AccumIrrigation
          [ExtraVariables].Script.AccumOutflowLat
          [ExtraVariables].Script.SoilWaterDeficit
          [Slurp].Leaf.Live.Wt
          [Slurp].Root.Live.Wt
          [Slurp].Leaf.Live.N
          [Slurp].Root.Live.N
          [Slurp].Leaf.Live.NConc
          [Slurp].Root.Live.NConc
          [Slurp].Root.WaterSupply
          [Slurp].Root.WaterUptake
          [Slurp].Leaf.Transpiration
          [Slurp].Leaf.WaterDemand
          [Slurp].Root.Depth
          [Slurp].Leaf.CoverTotal
          [Slurp].Leaf.CoverDead
          [Slurp].Leaf.LAI
          [Slurp].Leaf.Height
          [Slurp].Leaf.PotentialBiomass.Value()
          [Soil].SoilWater.SWmm
          [Soil].NO3N
          [ExtraVariables].Script.SoilNitrogenContent
          [Slurp].Arbitrator.N.TotalPlantDemand
          [MicroClimate].net_radn
          [MicroClimate].peta
          [MicroClimate].petr
          [ExtraVariables].Script.FomN
          [ExtraVariables].Script.HumN
          [ExtraVariables].Script.BiomN
          [ExtraVariables].Script.DltNMinRes
          [ExtraVariables].Script.DltNMinTot
          [Slurp].Leaf.Fw
          [Slurp].Leaf.Fn
          [Weather].Rain
      Fertiliser
      Irrigation
      SoluteManager
    Zone Zone3: same as MultiRootZone.Zone2
    MicroClimate: a_interception=0; b_interception=1; c_interception=0; d_interception=0; soil_albedo=0.23; sun_angle=15; soil_heat_flux_fraction=0.4; night_interception_fraction=0.5; refheight=2; albedo=0.15; emissivity=0.96; RadIntTotal=0
  Folder IdenticalZones
    Simulation OneZone
      Memo
        This is a simple test that plants SLURP, changes its leaf area index and potential biomass production on one occasion and presents some graphs of Plant, N and Water balance components to show things are working.
      Clock: StartDate=1998-10-14; EndDate=1999-02-01
      ControlledEnvironment: MaxT=25; MinT=10; Rain=0; Radn=20; PanEvap=0; VP=0; Wind=3; CO2=350; AirPressure=1010; Latitude=0; DayLength=12
      Summary
      SoilArbitrator Soil Arbitrator
      Zone Zone1: Area=1; Slope=0
        Soil: same as MultiRootZone.Zone1.Soil
        Plant Slurp: same as MultiRootZone.Zone1.Slurp
        MicroClimate: a_interception=0; b_interception=1; c_interception=0; d_interception=0; soil_albedo=0.23; sun_angle=15; soil_heat_flux_fraction=0.4; night_interception_fraction=0.5; refheight=2; albedo=0.26; emissivity=0.96; RadIntTotal=0
        Irrigation
        Fertiliser
        Manager SlurpSowingRule: same as MultiRootZone.Zone1.SlurpSowingRule
        Manager ExtraVariables: same as MultiRootZone.Zone1.ExtraVariables
        SurfaceOrganicMatter surface organic matter: same as MultiRootZone.Zone1.surface organic matter
        Operations
          1999-03-09  [Irrigation].Apply(0);
          1998-12-29  [Fertiliser].Apply(0, Fertiliser.Types.UreaN, 10);
        Report: EventNames=[Clock].DoReport
          VariableNames:
            [Clock].Today
            [ExtraVariables].Script.AccumPlantN
            [ExtraVariables].Script.AccumMineralisation
            [ExtraVariables].Script.AccumDenit
            [ExtraVariables].Script.AccumFert
            [ExtraVariables].Script.AccumLeach
            [ExtraVariables].Script.AccumDetach
            [ExtraVariables].Script.DeltaSoilOMN
            [ExtraVariables].Script.DeltaSurfaceOMN
            [ExtraVariables].Script.DeltaSoilMineralN
            [Slurp].Root.NSupply
            [Soil].SoilWater.Eo
            [Soil].SoilWater.Es
            [ExtraVariables].Script.SWC
            [ExtraVariables].Script.DUL
            [Soil].SoilWater.Drainage
            [Soil].SoilWater.Runoff
            [ExtraVariables].Script.OutFlowLat
            [Soil].SoilWater.pond
            [ExtraVariables].Script.AccumEO
            [ExtraVariables].Script.AccumEP
            [ExtraVariables].Script.AccumES
            [ExtraVariables].Script.AccumDrainage
            [ExtraVariables].Script.AccumRunoff
            [ExtraVariables].Script.AccumRainfall
            [ExtraVariables].Script.AccumIrrigation
            [ExtraVariables].Script.AccumOutflowLat
            [ExtraVariables].Script.SoilWaterDeficit
            [Slurp].Leaf.Live.Wt
            [Slurp].Root.Live.Wt
            [Slurp].Leaf.Live.N
            [Slurp].Root.Live.N
            [Slurp].Leaf.Live.NConc
            [Slurp].Root.Live.NConc
            [Slurp].Root.WaterSupply
            [Slurp].Root.WaterUptake
            [Slurp].Leaf.Transpiration
            [Slurp].Leaf.WaterDemand
            [Slurp].Root.Depth
            [Slurp].Root.Zones[1].Depth
            [Slurp].Root.Zones[1].LayerLive[1].Wt
            [Slurp].Root.Zones[1].LayerLive[2].Wt
            [Slurp].Root.Zones[1].LayerLive[3].Wt
            [Slurp].Root.Zones[1].LayerLive[4].Wt
            [Slurp].Leaf.CoverTotal
            [Slurp].Leaf.CoverDead
            [Slurp].Leaf.LAI
            [Slurp].Leaf.Height
            [Slurp].Leaf.PotentialBiomass.Value()
            [Slurp].Leaf.Transpiration
            [Slurp].Leaf.PotentialEP
            [Soil].SoilWater.SWmm
            [Soil].NO3N
            [ExtraVariables].Script.SoilNitrogenContent
            [Slurp].Arbitrator.N.TotalPlantDemand
            [MicroClimate].net_radn
            [MicroClimate].peta
            [MicroClimate].petr
            [ExtraVariables].Script.FomN
            [ExtraVariables].Script.HumN
            [ExtraVariables].Script.BiomN
            [ExtraVariables].Script.DltNMinRes
            [ExtraVariables].Script.DltNMinTot
            [Slurp].Leaf.Fw
            [Slurp].Leaf.Fn
            [Weather].Rain
        Manager ResetProduction: same as MultiRootZone.Zone1.ResetProduction
        Manager ResetLAI
          OverRidePath = Slurp.Leaf.LAIFunction.FixedValue
          OverRideValue = 0.5
          ChangeDate = 1999-01-01
```csharp
using System;
using Models.Core;
using System.Collections.Generic;
using System.Text;
using Models.PMF;
using Models;
using System.Xml.Serialization;
using APSIM.Shared.Utilities;

namespace Models
{
	[Serializable] 
	public class Script : Model
	{
		[Link] Plant Plant;
		[Link] Clock Clock;
		[Link] Zone zone;
		
		[Description("Path for coefficient to be Overwritten")]
		public string OverRidePath { get; set; }
		[Description("Value for new coefficient")]
		public double OverRideValue { get; set; }
		[Description("Sowing Date")]
		public DateTime ChangeDate { get; set; }
        
		[EventSubscribe("DoManagement")]
		private void OnDoManagement(object sender, EventArgs e)
		{
			if (Clock.Today.Date == ChangeDate)
			{
				object ResetValue = OverRideValue;
				zone.Set(OverRidePath, ResetValue);
			}
		}
	}
}
```
        Manager SetupRootZones
```csharp
using System;
using Models.Core;
using System.Collections.Generic;
using System.Text;
using Models.PMF;
using Models;
using System.Xml.Serialization;
using APSIM.Shared.Utilities;

namespace Models
{
	[Serializable] 
	public class Script : Model
	{
		[Link] Plant Slurp;
		[Link] Clock Clock;
		[Link] Zone zone;
        
		[EventSubscribe("Commencing")]
		private void OnSimulationCommencing(object sender, EventArgs e)
		{
			//Slurp.Root.ZoneNamesToGrowRootsIn.Add("Zone2");
			//Slurp.Root.ZoneNamesToGrowRootsIn.Add("Zone3");
			//Slurp.Root.ZoneRootDepths.Add(100);
			//Slurp.Root.ZoneRootDepths.Add(50);
			//Slurp.Root.ZoneInitialDM.Add(2000);
			//Slurp.Root.ZoneInitialDM.Add(1000);
		}
	}
}
```
        SoluteManager
      MicroClimate: a_interception=0; b_interception=1; c_interception=0; d_interception=0; soil_albedo=0.23; sun_angle=15; soil_heat_flux_fraction=0.4; night_interception_fraction=0.5; refheight=2; albedo=0.15; emissivity=0.96; RadIntTotal=0
    Simulation TwoZones
      Memo
        This is a simple test that plants SLURP, changes its leaf area index and potential biomass production on one occasion and presents some graphs of Plant, N and Water balance components to show things are working.
      Clock: StartDate=1998-10-14; EndDate=1999-02-01
      ControlledEnvironment: MaxT=25; MinT=10; Rain=0; Radn=20; PanEvap=0; VP=0; Wind=3; CO2=350; AirPressure=1010; Latitude=0; DayLength=12
      Summary
      SoilArbitrator Soil Arbitrator
      Zone Zone1: Area=1; Slope=0
        Soil: same as MultiRootZone.Zone1.Soil
        Plant Slurp: same as MultiRootZone.Zone1.Slurp
        MicroClimate: a_interception=0; b_interception=1; c_interception=0; d_interception=0; soil_albedo=0.23; sun_angle=15; soil_heat_flux_fraction=0.4; night_interception_fraction=0.5; refheight=2; albedo=0.26; emissivity=0.96; RadIntTotal=0
        Irrigation
        Fertiliser
        Manager SlurpSowingRule: same as MultiRootZone.Zone1.SlurpSowingRule
        Manager ExtraVariables: same as MultiRootZone.Zone1.ExtraVariables
        SurfaceOrganicMatter surface organic matter: same as MultiRootZone.Zone1.surface organic matter
        Operations
          1999-03-09  [Irrigation].Apply(0);
          1998-12-29  [Fertiliser].Apply(0, Fertiliser.Types.UreaN, 10);
        Report: EventNames=[Clock].DoReport
          VariableNames:
            [Clock].Today
            [ExtraVariables].Script.AccumPlantN
            [ExtraVariables].Script.AccumMineralisation
            [ExtraVariables].Script.AccumDenit
            [ExtraVariables].Script.AccumFert
            [ExtraVariables].Script.AccumLeach
            [ExtraVariables].Script.AccumDetach
            [ExtraVariables].Script.DeltaSoilOMN
            [ExtraVariables].Script.DeltaSurfaceOMN
            [ExtraVariables].Script.DeltaSoilMineralN
            [Slurp].Root.NSupply
            [Soil].SoilWater.Eo
            [Soil].SoilWater.Es
            [ExtraVariables].Script.SWC
            [ExtraVariables].Script.DUL
            [Soil].SoilWater.Drainage
            [Soil].SoilWater.Runoff
            [ExtraVariables].Script.OutFlowLat
            [Soil].SoilWater.pond
            [ExtraVariables].Script.AccumEO
            [ExtraVariables].Script.AccumEP
            [ExtraVariables].Script.AccumES
            [ExtraVariables].Script.AccumDrainage
            [ExtraVariables].Script.AccumRunoff
            [ExtraVariables].Script.AccumRainfall
            [ExtraVariables].Script.AccumIrrigation
            [ExtraVariables].Script.AccumOutflowLat
            [ExtraVariables].Script.SoilWaterDeficit
            [Slurp].Leaf.Live.Wt
            [Slurp].Root.Live.Wt
            [Slurp].Leaf.Live.N
            [Slurp].Root.Live.N
            [Slurp].Leaf.Live.NConc
            [Slurp].Root.Live.NConc
            [Slurp].Root.WaterSupply
            [Slurp].Root.WaterUptake
            [Slurp].Leaf.Transpiration
            [Slurp].Leaf.WaterDemand
            [Slurp].Root.Depth
            [Slurp].Root.Zones[1].Depth
            [Slurp].Root.Zones[2].Depth
            [Slurp].Root.Zones[1].LayerLive[1].Wt
            [Slurp].Root.Zones[1].LayerLive[2].Wt
            [Slurp].Root.Zones[1].LayerLive[3].Wt
            [Slurp].Root.Zones[1].LayerLive[4].Wt
            [Slurp].Root.Zones[2].LayerLive[1].Wt
            [Slurp].Root.Zones[2].LayerLive[2].Wt
            [Slurp].Root.Zones[2].LayerLive[3].Wt
            [Slurp].Root.Zones[2].LayerLive[4].Wt
            [Slurp].Leaf.CoverTotal
            [Slurp].Leaf.CoverDead
            [Slurp].Leaf.LAI
            [Slurp].Leaf.Height
            [Slurp].Leaf.PotentialBiomass.Value()
            [Soil].SoilWater.SWmm
            [Soil].NO3N
            [ExtraVariables].Script.SoilNitrogenContent
            [Slurp].Arbitrator.N.TotalPlantDemand
            [MicroClimate].net_radn
            [MicroClimate].peta
            [MicroClimate].petr
            [ExtraVariables].Script.FomN
            [ExtraVariables].Script.HumN
            [ExtraVariables].Script.BiomN
            [ExtraVariables].Script.DltNMinRes
            [ExtraVariables].Script.DltNMinTot
            [Slurp].Leaf.Fw
            [Slurp].Leaf.Fn
            [Weather].Rain
        Manager ResetProduction: same as MultiRootZone.Zone1.ResetProduction
        Manager ResetLAI: same as IdenticalZones.OneZone.Zone1.ResetLAI
        Manager SetupRootZones
```csharp
using System;
using Models.Core;
using System.Collections.Generic;
using System.Text;
using Models.PMF;
using Models;
using System.Xml.Serialization;
using APSIM.Shared.Utilities;

namespace Models
{
	[Serializable] 
	public class Script : Model
	{
		[Link] Plant Slurp;
		[Link] Clock Clock;
		[Link] Zone zone;
        
		[EventSubscribe("Commencing")]
		private void OnSimulationCommencing(object sender, EventArgs e)
		{
			Slurp.Root.ZoneNamesToGrowRootsIn.Add("Zone2");
			//Slurp.Root.ZoneNamesToGrowRootsIn.Add("Zone3");
			Slurp.Root.ZoneRootDepths.Add(200);
			//Slurp.Root.ZoneRootDepths.Add(50);
			Slurp.Root.ZoneInitialDM.Add(50);
			//Slurp.Root.ZoneInitialDM.Add(1000);
		}
	}
}
```
        SoluteManager
      Zone Zone2: same as MultiRootZone.Zone2
      MicroClimate: a_interception=0; b_interception=1; c_interception=0; d_interception=0; soil_albedo=0.23; sun_angle=15; soil_heat_flux_fraction=0.4; night_interception_fraction=0.5; refheight=2; albedo=0.15; emissivity=0.96; RadIntTotal=0
  Folder Agroforestry
    Simulation Warra
      Memo
        This is a simple test that plants SLURP, changes its leaf area index and potential biomass production on one occasion and presents some graphs of Plant, N and Water balance components to show things are working.
      Clock: StartDate=2004-03-22; EndDate=2005-10-04
      Weather: FileName=%root%\Prototypes\Agroforestry\Validation\warra.met
      Summary
      SoilArbitrator Soil Arbitrator
      Manager SowingRule
        SowDate = 26/06/2004
        CultivarName = h45
        SowingDepth = 30
        RowSpacing = 250
        Population = 120
        Amount = 60
        CropName = wheat
```csharp
using System;
using System.Collections.Generic;
using Models.Core;
using Models.Agroforestry;
using Models.PMF;
using Models.Soils;
using Models.Utilities;
using Models.Zones;
using APSIM.Shared.Utilities;

namespace Models
{
	[Serializable]
	public class Script : Model
	{
		[Link] Clock Clock;
		[Link] Summary Summary;
		
		[Description("Sowing date (d-mmm-yyyy)")]
		public string SowDate { get; set; }
		[Description("Cultivar to be sown")]
		public string CultivarName { get; set; }
		[Description("Sowing depth (mm)")]
		public double SowingDepth { get; set; }
		[Description("Row spacing (mm)")]
		public double RowSpacing { get; set; }
		[Description("Plant population (/m2)")]
		public double Population { get; set; }
		[Description("Amount of fertiliser to be applied (kg/ha)")]
		public double Amount { get; set; }
		[Description("Crop to be fertilised")]
		public string CropName { get; set; }
		
		private List<IModel> Zones;
		private Plant Wheat;
		private Soil Soil;
		
		[EventSubscribe("Commencing")]
		private void OnSimulationCommencing(object sender, EventArgs e)
		{
			Zones = Apsim.FindAll(this, typeof(RectangularZone));
		}
		
		[EventSubscribe("DoManagement")]
		private void OnDoManagement(object sender, EventArgs e)
		{		
			if (DateUtilities.DMYtoDate(SowDate) == Clock.Today)
			{
			
				foreach (Zone z in Zones)
				{
					Wheat = Apsim.Find(z, typeof(Plant)) as Plant;	
					Soil = Apsim.Find(z, typeof(Soil)) as Soil;
							
					if (Wheat != null && !Wheat.IsAlive)
					{
						Wheat.Sow(population: Population, cultivar: CultivarName, depth: SowingDepth, rowSpacing: RowSpacing);
						Fertiliser Fertiliser = Apsim.Find(Wheat.Parent, typeof(Fertiliser)) as Fertiliser;
						Fertiliser.Apply(Amount: Amount, Type: Fertiliser.Types.NO3N);
					}
					//else
					//	throw new ApsimXException(null, "Cannot sow wheat on that date");

					if (Wheat != null && Wheat.IsReadyForHarvesting)
					{
			   			Wheat.Harvest();
			   			Wheat.EndCrop();	
					}
		
				}
			}
		}
	}
}
```
      Manager Calculations
        AverageSoilWater = 0
```csharp
using System;
using Models.Core;
using System.Collections.Generic;
using System.Text;
using Models.PMF;
using Models;
using System.Xml.Serialization;
using APSIM.Shared.Utilities;
using Models.Soils;
using Models.Zones;

namespace Models
{
	[Serializable] 
	public class Script : Model
	{
		[Link] Plant Slurp;
		[Link] Clock Clock;
		private List<IModel> Zones;
		private Soil Soil;
		public double AverageSoilWater { get; set; }
        
		[EventSubscribe("Commencing")]
		private void OnSimulationCommencing(object sender, EventArgs e)
		{
			Zones = Apsim.FindAll(this, typeof(RectangularZone));
			AverageSoilWater = 0;
		}
		
		[EventSubscribe("EndOfDay")]
		private void OnEndOfDay(object sender, EventArgs e)
		{
			double TotalArea = 0;
			double TotalWater = 0;
			foreach (Zone z in Zones)
			{
				Soil = Apsim.Find(z, typeof(Soil)) as Soil;
				TotalArea += z.Area;
				for (int i = 0; i <= 4; i++)
					TotalWater += Soil.Water[i] * z.Area;					
			}
			AverageSoilWater = TotalWater / TotalArea;
		}
	}
}
```
      RectangularZone TreeRow: Area=0.05; Slope=0; Length=100; Width=5
        MicroClimate: a_interception=0.2; b_interception=1; c_interception=0; d_interception=0; soil_albedo=0.23; sun_angle=15; soil_heat_flux_fraction=0.4; night_interception_fraction=0.5; refheight=2; albedo=0.15; emissivity=0.96; RadIntTotal=0
        Report: EventNames=[Clock].DoReport
          VariableNames:
            [Clock].Today
            [Slurp].Root.NSupply
            [Soil].SoilWater.Eo
            [Soil].SoilWater.Es
            [Soil].SoilWater.Drainage
            [Soil].SoilWater.Runoff
            [Soil].SoilWater.pond
            sum([Soil].SoilWater.SWmm[1:5]) as SW90cm
            [Slurp].Leaf.Live.Wt
            [Slurp].Root.Live.Wt
            [Slurp].Leaf.Live.N
            [Slurp].Root.Live.N
            [Slurp].Leaf.Live.NConc
            [Slurp].Root.Live.NConc
            [Slurp].Root.WaterSupply
            [Slurp].Root.WaterUptake
            [Slurp].Leaf.Transpiration
            [Slurp].Leaf.WaterDemand
            [Slurp].Root.Depth
            [Slurp].Root.Zones[1].Depth
            [Slurp].Root.Zones[2].Depth
            [Slurp].Root.Zones[3].Depth
            [Slurp].Root.Zones[4].Depth
            [Slurp].Root.Zones[5].Depth
            [Slurp].Root.Zones[1].LayerLive[1].Wt
            [Slurp].Root.Zones[1].LayerLive[2].Wt
            [Slurp].Root.Zones[1].LayerLive[3].Wt
            [Slurp].Root.Zones[1].LayerLive[4].Wt
            [Slurp].Root.Zones[2].LayerLive[1].Wt
            [Slurp].Root.Zones[2].LayerLive[2].Wt
            [Slurp].Root.Zones[2].LayerLive[3].Wt
            [Slurp].Root.Zones[2].LayerLive[4].Wt
            [Slurp].Leaf.CoverTotal
            [Slurp].Leaf.CoverDead
            [Slurp].Leaf.LAI
            [Slurp].Leaf.Height
            [Slurp].Leaf.PotentialBiomass.Value()
            [Slurp].Leaf.FRGRFunction.Value()
            [Soil].SoilWater.SWmm
            sum([Soil].SoilWater.SWmm) as TotalSoilWater
            [Soil].NO3N
            [Slurp].Arbitrator.N.TotalPlantDemand
            [Slurp].Leaf.Fw
            [Slurp].Leaf.Fn
            [Weather].Rain
            [Calculations].Script.AverageSoilWater
            [SurfaceOrganicMatter].Cover
        Fertiliser
        Manager SlurpSowingRule
          CultivarName = StaticCrop
          InitialRootDepth = 1500
          SowingDate = 2004-03-22
          script: same as in MultiRootZone.Zone1.SlurpSowingRule
        SurfaceOrganicMatter: PoolName=wheat_stubble; type=wheat; mass=500; standing_fraction=0; cnr=100; CriticalResidueWeight=2000; OptimumDecompTemp=20; MaxCumulativeEOS=20; CNRatioDecompCoeff=0.277; CNRatioDecompThreshold=25; TotalLeachRain=25; MinRainToLeach=10; CriticalMinimumOrganicC=0.004; DefaultCPRatio=0; DefaultStandingFraction=0; StandingExtinctCoeff=0.5; FractionFaecesAdded=0.5
          Pools:
            {PoolName=wheat_stubble, ResidueType=wheat, Mass=500, CNRatio=100, StandingFraction=0}
          ResidueTypes: LoadFromResource=ResidueTypes
        Plant Slurp: CropType=Slurp
          Memo TitlePage: same as MultiRootZone.Zone1.Slurp.TitlePage
          OrganArbitrator Arbitrator
            RelativeAllocation NArbitrator
            RelativeAllocation DMArbitrator
          Root: GrowthRespiration=0; MaintenanceRespiration=0
            CompositeBiomass Live: Propertys=[[Root].LayerLive]
            CompositeBiomass Dead: Propertys=[[Root].LayerDead]
            MultiplyFunction RootFrontVelocity
              AirTemperatureFunction TemperatureEffect
                XYPairs: X=[0, 26, 35]; Y=[1, 1, 1]
              Constant Potential: FixedValue=0; Units=mm/d
            Constant MaxDailyNUptake: FixedValue=100; Units=g/m2
            Constant MaximumRootDepth: FixedValue=10000; Units=mm
            Constant NitrogenDemandSwitch: FixedValue=1; Units=0-1
            Constant MaximumNConc: FixedValue=0.01
            Constant MinimumNConc: FixedValue=0.01
            LinearInterpolationFunction KLModifier: same as MultiRootZone.Zone1.Slurp.Root.KLModifier
            Constant InitialDM: FixedValue=50; Units=g/plant
            Constant SenescenceRate: FixedValue=0; Units=/d
            Constant SpecificRootLength: FixedValue=40; Units=m/g
            LinearInterpolationFunction KNO3: XProperty=[Root].LengthDensity
              XYPairs: X=[0, 0.003]; Y=[0.02, 0.02]
            LinearInterpolationFunction KNH4: XProperty=[Root].LengthDensity
              XYPairs: X=[0, 0.003]; Y=[0, 0]
            BiomassRemoval BiomassRemovalDefaults: same as MultiRootZone.Zone1.Slurp.Root.BiomassRemovalDefaults
            LinearInterpolationFunction NUptakeSWFactor: XProperty=[Root].RWC
              XYPairs: X=[0, 1]; Y=[1, 1]
            PartitionFractionDemandFunction DMDemandFunction
              Constant PartitionFraction: FixedValue=0.2; Units=0-1
          SimpleLeaf Leaf: CohortsInitialised=false; Albedo=0.018; Gsmax=0.01; R50=200; MicroClimatePresent=true
            zero: TipsAtEmergence, CohortsAtInitialisation, InitialisedCohortNo, AppearedCohortNo, PlantAppearedLeafNo, LAI, Height, FRGR, PotentialEP, KDead, LAIDead
            Biomass Live
            Biomass Dead
            Constant DetachmentRateFunction: FixedValue=0; Units=/d
            MultiplyFunction InitialWtFunction
              Constant InitialPlantWt: FixedValue=0; Units=g/plant
              VariableReference Population: VariableName=[Plant].Population
            Constant LaiDeadFunction: FixedValue=0; Units=m^2/m^2
            Constant Photosynthesis: FixedValue=0; Units=g/m2/d
            AirTemperatureFunction FRGRFunction
              XYPairs: X=[5, 20, 25, 35]; Y=[0, 1, 1, 0]
            PartitionFractionDemandFunction DMDemandFunction
              Constant PartitionFraction: FixedValue=1; Units=0-1
            Constant MaximumNConc: FixedValue=0.05; Units=g/g
            Constant MinimumNConc: FixedValue=0.05; Units=g/g
            Constant LAIFunction: FixedValue=5; Units=m2/m2
            Constant ExtinctionCoefficientFunction: FixedValue=0.7
            Constant StructuralFraction: FixedValue=0.5; Units=0-1
            Constant HeightFunction: FixedValue=10000; Units=mm
            Constant NReallocationFactor: FixedValue=0
            Constant SenescenceRate: FixedValue=0
            BiomassRemoval BiomassRemovalDefaults: same as MultiRootZone.Zone1.Slurp.Root.BiomassRemovalDefaults
            Constant MaintenanceRespirationFunction: FixedValue=0; Units=0-1
            Constant DMConversionEfficiency: FixedValue=1; Units=0-1
            Constant NRetranslocationFactor: FixedValue=0
            Constant NitrogenDemandSwitch: FixedValue=1
            Constant DMReallocationFactor: FixedValue=0
            Constant DMRetranslocationFactor: FixedValue=0
            VariableReference CriticalNConc: VariableName=[Leaf].MinimumNConc.Value()
          Cultivar StaticCrop
            Memo Description
              The static crop is the base crop and uses all the paramaters values specified above.
          Cultivar StaticTree: same as MultiRootZone.Zone1.Slurp.StaticTree
          Cultivar Pasture: same as MultiRootZone.Zone1.Slurp.Pasture
          Cultivar Lucerne: same as MultiRootZone.Zone1.Slurp.Lucerne
        Soil: ASCOrder=Vertosol; ASCSubOrder=Grey; SoilType=Clay; Site=Warra; NearestTown=Warra, Q, 4411; Region=Darling Downs and Granite Belt; State=Queensland; Country=Australia; NaturalVegetation=Brigalow scrub; ApsoilNumber=19; Latitude=-26.897; Longitude=150.909; LocationAccuracy=+/- 20m; DataSource=0; Comments=CSIRO Sustainable Ecosystems, Toowoomba
          Water
            Thickness  BD    AirDry  LL15  DUL   SAT   KS
            50         1.39  0.06    0.18  0.4   0.45  20
            100        1.39  0.1     0.18  0.4   0.45  20
            150        1.35  0.17    0.18  0.41  0.46  20
            300        1.35  0.17    0.18  0.41  0.46  20
            300        1.43  0.17    0.18  0.38  0.43  20
            300        1.44  0.17    0.18  0.38  0.43  20
            300        1.45  0.17    0.18  0.37  0.42  20
            SoilCrop SlurpSoil: LL=[0.18, 0.18, 0.18, 0.18, 0.18, 0.18, 0.18]; KL=[0.06, 0.05, 0.05, 0.05, 0.05, 0.05, 0.05]; XF=[1, 1, 1, 1, 1, 1, 1]
            SoilCrop WheatSoil: LL=[0.18, 0.18, 0.19, 0.19, 0.2, 0.23, 0.25]; KL=[0.06, 0.06, 0.06, 0.06, 0.06, 0.06, 0.06]; XF=[1, 1, 1, 1, 1, 1, 1]
          SoilWater: SummerDate=1-Nov; SummerU=5; SummerCona=5; WinterDate=1-Apr; WinterU=5; WinterCona=5; DiffusConst=40; DiffusSlope=16; Salb=0.12; CN2Bare=73; CNRed=20; CNCov=0.8; max_pond=0; Thickness=[150, 150, 300, 300, 300, 300]; SWCON=[0.3, 0.3, 0.3, 0.3, 0.3, 0.3]; residueinterception=0
          SoilNitrogen: fom_type=[default, manure, mucuna, lablab, shemp, stable]; fract_carb=[0.2, 0.3, 0.54, 0.57, 0.45, 0]; fract_cell=[0.7, 0.3, 0.37, 0.37, 0.47, 0.1]; fract_lign=[0.1, 0.4, 0.09, 0.06, 0.08, 0.9]
          SoilOrganicMatter: RootCN=40; RootWt=1000; SoilCN=12; EnrACoeff=7.4; EnrBCoeff=0.2; OCUnits=Total
            Thickness  OC     FBiom  FInert
            150        0.915  0.04   0.4
            150        0.777  0.02   0.6
            300        0.346  0.02   0.8
            300        0.231  0.02   1
            300        0.154  0.01   1
            300        0.123  0.01   1
          Analysis: Thickness=[150, 150, 300, 300, 300, 300]; PH=[8, 8, 8, 8, 8, 8]; PHUnits=Water; BoronUnits=HotWater
          Sample InitialN: NO3Units=ppm; NH4Units=ppm; SWUnits=Volumetric; OCUnits=Total; PHUnits=Water
            Thickness  NO3  NH4
            150        1    0.1
            150        1    0.1
            300        1    0.1
            300        1    0.1
            300        1    0.1
            300        1    0.1
          Fertiliser
          Sample: NO3Units=ppm; NH4Units=ppm; SWUnits=Volumetric; OCUnits=Total; PHUnits=Water
            Thickness  NO3  NH4  SW
            50         1    0.1  0.2
            100        1    0.1  0.3
            150        1    0.1  0.29
            300        1    0.1  0.28
            300        1    0.1  0.26
            300        1    0.1  0.26
            300        1    0.1  0.29
          CERESSoilTemperature
        Manager SetupRootZones
```csharp
using System;
using Models.Core;
using System.Collections.Generic;
using System.Text;
using Models.PMF;
using Models;
using System.Xml.Serialization;
using APSIM.Shared.Utilities;

namespace Models
{
	[Serializable] 
	public class Script : Model
	{
		[Link] Plant Slurp;
		[Link] Clock Clock;
		[Link] Zone zone;
        
		[EventSubscribe("Commencing")]
		private void OnSimulationCommencing(object sender, EventArgs e)
		{
			
			Slurp.Root.ZoneNamesToGrowRootsIn.Add("5m");
			Slurp.Root.ZoneRootDepths.Add(1500);
			Slurp.Root.ZoneInitialDM.Add(1000);

			Slurp.Root.ZoneNamesToGrowRootsIn.Add("10m");
			Slurp.Root.ZoneRootDepths.Add(1500);
			Slurp.Root.ZoneInitialDM.Add(1000);

			Slurp.Root.ZoneNamesToGrowRootsIn.Add("15m");
			Slurp.Root.ZoneRootDepths.Add(1500);
			Slurp.Root.ZoneInitialDM.Add(1000);

			Slurp.Root.ZoneNamesToGrowRootsIn.Add("20m");
			Slurp.Root.ZoneRootDepths.Add(600);
			Slurp.Root.ZoneInitialDM.Add(1000);


			Slurp.Root.ZoneNamesToGrowRootsIn.Add("30m");
			Slurp.Root.ZoneRootDepths.Add(300);
			Slurp.Root.ZoneInitialDM.Add(1000);			
		}
	}
}
```
        SoluteManager
      RectangularZone 5m: Area=0.05; Slope=0; Length=100; Width=5
        Report: EventNames=[Clock].DoReport
          VariableNames:
            [Clock].Today
            [Slurp].Root.NSupply
            [Soil].SoilWater.Eo
            [Soil].SoilWater.Es
            [Soil].SoilWater.Drainage
            [Soil].SoilWater.Runoff
            [Soil].SoilWater.pond
            sum([Soil].SoilWater.SWmm[1:5]) as SW90cm
            [Slurp].Leaf.Live.Wt
            [Slurp].Root.Live.Wt
            [Slurp].Leaf.Live.N
            [Slurp].Root.Live.N
            [Slurp].Leaf.Live.NConc
            [Slurp].Root.Live.NConc
            [Slurp].Root.WaterSupply
            [Slurp].Root.WaterUptake
            [Slurp].Leaf.Transpiration
            [Slurp].Leaf.WaterDemand
            [Slurp].Root.Depth
            [Slurp].Root.Zones[1].Depth
            [Slurp].Root.Zones[2].Depth
            [Slurp].Root.Zones[1].LayerLive[1].Wt
            [Slurp].Root.Zones[1].LayerLive[2].Wt
            [Slurp].Root.Zones[1].LayerLive[3].Wt
            [Slurp].Root.Zones[1].LayerLive[4].Wt
            [Slurp].Root.Zones[2].LayerLive[1].Wt
            [Slurp].Root.Zones[2].LayerLive[2].Wt
            [Slurp].Root.Zones[2].LayerLive[3].Wt
            [Slurp].Root.Zones[2].LayerLive[4].Wt
            [Slurp].Leaf.CoverTotal
            [Slurp].Leaf.CoverDead
            [Slurp].Leaf.LAI
            [Slurp].Leaf.Height
            [Slurp].Leaf.PotentialBiomass.Value()
            [Soil].SoilWater.SWmm
            sum([Soil].SoilWater.SWmm) as TotalSoilWater
            [Soil].NO3N
            [Slurp].Arbitrator.N.TotalPlantDemand
            [Slurp].Leaf.Fw
            [Slurp].Leaf.Fn
            [Weather].Rain
            [Wheat].AboveGround.Wt
            [Wheat].SWStress.Photo
            [Wheat].Root.RootDepth
        Fertiliser
        SurfaceOrganicMatter: same as Agroforestry.Warra.TreeRow.SurfaceOrganicMatter
        Soil: ASCOrder=Vertosol; ASCSubOrder=Grey; SoilType=Clay; Site=Warra; NearestTown=Warra, Q, 4411; Region=Darling Downs and Granite Belt; State=Queensland; Country=Australia; NaturalVegetation=Brigalow scrub; ApsoilNumber=19; Latitude=-26.897; Longitude=150.909; LocationAccuracy=+/- 20m; DataSource=0; Comments=CSIRO Sustainable Ecosystems, Toowoomba
          Water
            Thickness  BD    AirDry  LL15  DUL   SAT   KS
            50         1.39  0.06    0.18  0.4   0.45  20
            100        1.39  0.1     0.18  0.4   0.45  20
            150        1.35  0.17    0.18  0.41  0.46  20
            300        1.35  0.17    0.18  0.41  0.46  20
            300        1.43  0.17    0.18  0.38  0.43  20
            300        1.44  0.17    0.18  0.38  0.43  20
            300        1.45  0.17    0.18  0.37  0.42  20
            SoilCrop SlurpSoil: LL=[0.18, 0.18, 0.18, 0.18, 0.18, 0.18, 0.18]; KL=[0.04, 0.04, 0.03, 0.02, 0.005, 0.005, 0.005]; XF=[1, 1, 1, 1, 1, 1, 1]
            SoilCrop WheatSoil: LL=[0.18, 0.18, 0.19, 0.19, 0.2, 0.23, 0.25]; KL=[0.06, 0.06, 0.06, 0.06, 0.06, 0.06, 0.06]; XF=[1, 1, 1, 1, 1, 1, 1]
          SoilWater: SummerDate=1-Nov; SummerU=6; SummerCona=3.5; WinterDate=1-Apr; WinterU=6; WinterCona=3.5; DiffusConst=40; DiffusSlope=16; Salb=0.12; CN2Bare=73; CNRed=20; CNCov=0.8; max_pond=0; Thickness=[150, 150, 300, 300, 300, 300]; SWCON=[0.3, 0.3, 0.3, 0.3, 0.3, 0.3]; residueinterception=0
          SoilNitrogen: fom_type=[default, manure, mucuna, lablab, shemp, stable]; fract_carb=[0.2, 0.3, 0.54, 0.57, 0.45, 0]; fract_cell=[0.7, 0.3, 0.37, 0.37, 0.47, 0.1]; fract_lign=[0.1, 0.4, 0.09, 0.06, 0.08, 0.9]
          SoilOrganicMatter: same as Agroforestry.Warra.TreeRow.Soil.SoilOrganicMatter
          Analysis: Thickness=[150, 150, 300, 300, 300, 300]; PH=[8, 8, 8, 8, 8, 8]; PHUnits=Water; BoronUnits=HotWater
          Sample InitialN: NO3Units=ppm; NH4Units=ppm; SWUnits=Volumetric; OCUnits=Total; PHUnits=Water
            Thickness  NO3  NH4
            150        1    0.1
            150        1    0.1
            300        1    0.1
            300        1    0.1
            300        1    0.1
            300        1    0.1
          Fertiliser
          Sample: NO3Units=ppm; NH4Units=ppm; SWUnits=Volumetric; OCUnits=Total; PHUnits=Water
            Thickness  NO3  NH4  SW
            50         1    0.1  0.2
            100        1    0.1  0.25
            150        1    0.1  0.3
            300        1    0.1  0.3
            300        1    0.1  0.31
            300        1    0.1  0.3
            300        1    0.1  0.3
          CERESSoilTemperature
        SoluteManager
      RectangularZone 10m: Area=0.05; Slope=0; Length=100; Width=5
        Report: same as Agroforestry.Warra.5m.Report
        Fertiliser
        SurfaceOrganicMatter: same as Agroforestry.Warra.TreeRow.SurfaceOrganicMatter
        Soil: ASCOrder=Vertosol; ASCSubOrder=Grey; SoilType=Clay; Site=Warra; NearestTown=Warra, Q, 4411; Region=Darling Downs and Granite Belt; State=Queensland; Country=Australia; NaturalVegetation=Brigalow scrub; ApsoilNumber=19; Latitude=-26.897; Longitude=150.909; LocationAccuracy=+/- 20m; DataSource=0; Comments=CSIRO Sustainable Ecosystems, Toowoomba
          Water
            Thickness  BD    AirDry  LL15  DUL   SAT   KS
            50         1.39  0.06    0.18  0.4   0.45  20
            100        1.39  0.1     0.18  0.4   0.45  20
            150        1.35  0.17    0.18  0.41  0.46  20
            300        1.35  0.17    0.18  0.41  0.46  20
            300        1.43  0.17    0.18  0.38  0.43  20
            300        1.44  0.17    0.18  0.38  0.43  20
            300        1.45  0.17    0.18  0.37  0.42  20
            SoilCrop SlurpSoil: LL=[0.18, 0.18, 0.18, 0.18, 0.18, 0.18, 0.18]; KL=[0.03, 0.03, 0.02, 0.01, 0.01, 0.01, 0]; XF=[1, 1, 1, 1, 1, 1, 1]
            SoilCrop WheatSoil: LL=[0.18, 0.18, 0.19, 0.19, 0.2, 0.23, 0.25]; KL=[0.06, 0.06, 0.06, 0.06, 0.06, 0.06, 0.06]; XF=[1, 1, 1, 1, 1, 1, 1]
          SoilWater: same as Agroforestry.Warra.TreeRow.Soil.SoilWater
          SoilNitrogen: fom_type=[default, manure, mucuna, lablab, shemp, stable]; fract_carb=[0.2, 0.3, 0.54, 0.57, 0.45, 0]; fract_cell=[0.7, 0.3, 0.37, 0.37, 0.47, 0.1]; fract_lign=[0.1, 0.4, 0.09, 0.06, 0.08, 0.9]
          SoilOrganicMatter: same as Agroforestry.Warra.TreeRow.Soil.SoilOrganicMatter
          Analysis: Thickness=[150, 150, 300, 300, 300, 300]; PH=[8, 8, 8, 8, 8, 8]; PHUnits=Water; BoronUnits=HotWater
          Sample InitialN: NO3Units=ppm; NH4Units=ppm; SWUnits=Volumetric; OCUnits=Total; PHUnits=Water
            Thickness  NO3  NH4
            150        1    0.1
            150        1    0.1
            300        1    0.1
            300        1    0.1
            300        1    0.1
            300        1    0.1
          Fertiliser
          Sample: NO3Units=ppm; NH4Units=ppm; SWUnits=Volumetric; OCUnits=Total; PHUnits=Water
            Thickness  NO3  NH4  SW
            50         1    0.1  0.2
            100        1    0.1  0.3
            150        1    0.1  0.35
            300        1    0.1  0.33
            300        1    0.1  0.3
            300        1    0.1  0.26
            300        1    0.1  0.29
          CERESSoilTemperature
        SoluteManager
      RectangularZone 15m: Area=0.05; Slope=0; Length=100; Width=5
        Report: same as Agroforestry.Warra.5m.Report
        Fertiliser
        SurfaceOrganicMatter: same as Agroforestry.Warra.TreeRow.SurfaceOrganicMatter
        Soil: ASCOrder=Vertosol; ASCSubOrder=Grey; SoilType=Clay; Site=Warra; NearestTown=Warra, Q, 4411; Region=Darling Downs and Granite Belt; State=Queensland; Country=Australia; NaturalVegetation=Brigalow scrub; ApsoilNumber=19; Latitude=-26.897; Longitude=150.909; LocationAccuracy=+/- 20m; DataSource=0; Comments=CSIRO Sustainable Ecosystems, Toowoomba
          Water: same as Agroforestry.Warra.10m.Soil.Water
          SoilWater: same as Agroforestry.Warra.TreeRow.Soil.SoilWater
          SoilNitrogen: fom_type=[default, manure, mucuna, lablab, shemp, stable]; fract_carb=[0.2, 0.3, 0.54, 0.57, 0.45, 0]; fract_cell=[0.7, 0.3, 0.37, 0.37, 0.47, 0.1]; fract_lign=[0.1, 0.4, 0.09, 0.06, 0.08, 0.9]
          SoilOrganicMatter: same as Agroforestry.Warra.TreeRow.Soil.SoilOrganicMatter
          Analysis: Thickness=[150, 150, 300, 300, 300, 300]; PH=[8, 8, 8, 8, 8, 8]; PHUnits=Water; BoronUnits=HotWater
          Sample InitialN: NO3Units=ppm; NH4Units=ppm; SWUnits=Volumetric; OCUnits=Total; PHUnits=Water
            Thickness  NO3  NH4
            150        1    0.1
            150        1    0.1
            300        1    0.1
            300        1    0.1
            300        1    0.1
            300        1    0.1
          Fertiliser
          Sample: NO3Units=ppm; NH4Units=ppm; SWUnits=Volumetric; OCUnits=Total; PHUnits=Water
            Thickness  NO3  NH4  SW
            50         1    0.1  0.2
            100        1    0.1  0.32
            150        1    0.1  0.34
            300        1    0.1  0.35
            300        1    0.1  0.38
            300        1    0.1  0.34
            300        1    0.1  0.32
          CERESSoilTemperature
        SoluteManager
      RectangularZone 20m: Area=0.1; Slope=0; Length=100; Width=10
        Report: same as Agroforestry.Warra.5m.Report
        Fertiliser
        SurfaceOrganicMatter: same as Agroforestry.Warra.TreeRow.SurfaceOrganicMatter
        Soil: ASCOrder=Vertosol; ASCSubOrder=Grey; SoilType=Clay; Site=Warra; NearestTown=Warra, Q, 4411; Region=Darling Downs and Granite Belt; State=Queensland; Country=Australia; NaturalVegetation=Brigalow scrub; ApsoilNumber=19; Latitude=-26.897; Longitude=150.909; LocationAccuracy=+/- 20m; DataSource=0; Comments=CSIRO Sustainable Ecosystems, Toowoomba
          Water
            Thickness  BD    AirDry  LL15  DUL   SAT   KS
            50         1.39  0.06    0.18  0.4   0.45  20
            100        1.39  0.1     0.18  0.4   0.45  20
            150        1.35  0.17    0.18  0.41  0.46  20
            300        1.35  0.17    0.18  0.41  0.46  20
            300        1.43  0.17    0.18  0.38  0.43  20
            300        1.44  0.17    0.18  0.38  0.43  20
            300        1.45  0.17    0.18  0.37  0.42  20
            SoilCrop SlurpSoil: LL=[0.18, 0.18, 0.18, 0.18, 0.18, 0.18, 0.18]; KL=[0.03, 0.02, 0.01, 0.01, 0.005, 0, 0]; XF=[1, 1, 1, 1, 1, 1, 1]
            SoilCrop WheatSoil: LL=[0.18, 0.18, 0.19, 0.19, 0.2, 0.23, 0.25]; KL=[0.06, 0.06, 0.06, 0.06, 0.06, 0.06, 0.06]; XF=[1, 1, 1, 1, 1, 1, 1]
          SoilWater: same as Agroforestry.Warra.TreeRow.Soil.SoilWater
          SoilNitrogen: fom_type=[default, manure, mucuna, lablab, shemp, stable]; fract_carb=[0.2, 0.3, 0.54, 0.57, 0.45, 0]; fract_cell=[0.7, 0.3, 0.37, 0.37, 0.47, 0.1]; fract_lign=[0.1, 0.4, 0.09, 0.06, 0.08, 0.9]
          SoilOrganicMatter: same as Agroforestry.Warra.TreeRow.Soil.SoilOrganicMatter
          Analysis: Thickness=[150, 150, 300, 300, 300, 300]; PH=[8, 8, 8, 8, 8, 8]; PHUnits=Water; BoronUnits=HotWater
          Sample InitialN: NO3Units=ppm; NH4Units=ppm; SWUnits=Volumetric; OCUnits=Total; PHUnits=Water
            Thickness  NO3  NH4
            150        1    0.1
            150        1    0.1
            300        1    0.1
            300        1    0.1
            300        1    0.1
            300        1    0.1
          Fertiliser
          Sample: NO3Units=ppm; NH4Units=ppm; SWUnits=Volumetric; OCUnits=Total; PHUnits=Water
            Thickness  NO3  NH4  SW
            50         1    0.1  0.32
            100        1    0.1  0.32
            150        1    0.1  0.39
            300        1    0.1  0.39
            300        1    0.1  0.38
            300        1    0.1  0.36
            300        1    0.1  0.35
          CERESSoilTemperature
        SoluteManager
      RectangularZone 30m: Area=0.05; Slope=0; Length=100; Width=5
        Report: same as Agroforestry.Warra.5m.Report
        Fertiliser
        SurfaceOrganicMatter: same as Agroforestry.Warra.TreeRow.SurfaceOrganicMatter
        Soil: ASCOrder=Vertosol; ASCSubOrder=Grey; SoilType=Clay; Site=Warra; NearestTown=Warra, Q, 4411; Region=Darling Downs and Granite Belt; State=Queensland; Country=Australia; NaturalVegetation=Brigalow scrub; ApsoilNumber=19; Latitude=-26.897; Longitude=150.909; LocationAccuracy=+/- 20m; DataSource=0; Comments=CSIRO Sustainable Ecosystems, Toowoomba
          Water
            Thickness  BD    AirDry  LL15  DUL   SAT   KS
            50         1.39  0.06    0.18  0.4   0.45  20
            100        1.39  0.1     0.18  0.4   0.45  20
            150        1.35  0.17    0.18  0.41  0.46  20
            300        1.35  0.17    0.18  0.41  0.46  20
            300        1.43  0.17    0.18  0.38  0.43  20
            300        1.44  0.17    0.18  0.38  0.43  20
            300        1.45  0.17    0.18  0.37  0.42  20
            SoilCrop SlurpSoil: LL=[0.18, 0.18, 0.18, 0.18, 0.18, 0.18, 0.18]; KL=[0.03, 0.02, 0.005, 0, 0, 0, 0]; XF=[1, 1, 1, 1, 1, 1, 1]
            SoilCrop WheatSoil: LL=[0.18, 0.18, 0.19, 0.19, 0.2, 0.23, 0.25]; KL=[0.06, 0.06, 0.06, 0.06, 0.06, 0.06, 0.06]; XF=[1, 1, 1, 1, 1, 1, 1]
          SoilWater: same as Agroforestry.Warra.TreeRow.Soil.SoilWater
          SoilNitrogen: fom_type=[default, manure, mucuna, lablab, shemp, stable]; fract_carb=[0.2, 0.3, 0.54, 0.57, 0.45, 0]; fract_cell=[0.7, 0.3, 0.37, 0.37, 0.47, 0.1]; fract_lign=[0.1, 0.4, 0.09, 0.06, 0.08, 0.9]
          SoilOrganicMatter: same as Agroforestry.Warra.TreeRow.Soil.SoilOrganicMatter
          Analysis: Thickness=[150, 150, 300, 300, 300, 300]; PH=[8, 8, 8, 8, 8, 8]; PHUnits=Water; BoronUnits=HotWater
          Sample InitialN: NO3Units=ppm; NH4Units=ppm; SWUnits=Volumetric; OCUnits=Total; PHUnits=Water
            Thickness  NO3  NH4
            150        1    0.1
            150        1    0.1
            300        1    0.1
            300        1    0.1
            300        1    0.1
            300        1    0.1
          Fertiliser
          Sample: NO3Units=ppm; NH4Units=ppm; SWUnits=Volumetric; OCUnits=Total; PHUnits=Water
            Thickness  NO3  NH4  SW
            50         1    0.1  0.32
            100        1    0.1  0.32
            150        1    0.1  0.38
            300        1    0.1  0.38
            300        1    0.1  0.38
            300        1    0.1  0.36
            300        1    0.1  0.35
          CERESSoilTemperature
        Plant Wheat: CropType=Wheat
        SoluteManager
      RectangularZone 40m: Area=0.1; Slope=0; Length=100; Width=10
        Report: same as Agroforestry.Warra.5m.Report
        Fertiliser
        SurfaceOrganicMatter: same as Agroforestry.Warra.TreeRow.SurfaceOrganicMatter
        Soil: ASCOrder=Vertosol; ASCSubOrder=Grey; SoilType=Clay; Site=Warra; NearestTown=Warra, Q, 4411; Region=Darling Downs and Granite Belt; State=Queensland; Country=Australia; NaturalVegetation=Brigalow scrub; ApsoilNumber=19; Latitude=-26.897; Longitude=150.909; LocationAccuracy=+/- 20m; DataSource=0; Comments=CSIRO Sustainable Ecosystems, Toowoomba
          Water
            Thickness  BD    AirDry  LL15  DUL   SAT   KS
            50         1.39  0.06    0.18  0.4   0.45  20
            100        1.39  0.1     0.18  0.4   0.45  20
            150        1.35  0.17    0.18  0.41  0.46  20
            300        1.35  0.17    0.18  0.41  0.46  20
            300        1.43  0.17    0.18  0.38  0.43  20
            300        1.44  0.17    0.18  0.38  0.43  20
            300        1.45  0.17    0.18  0.37  0.42  20
            SoilCrop SlurpSoil: LL=[0.18, 0.18, 0.18, 0.18, 0.18, 0.18, 0.18]; KL=[0.06, 0.06, 0.06, 0.06, 0.06, 0.06, 0.06]; XF=[1, 1, 1, 1, 1, 1, 1]
            SoilCrop WheatSoil: LL=[0.18, 0.18, 0.19, 0.19, 0.2, 0.23, 0.25]; KL=[0.06, 0.06, 0.06, 0.06, 0.06, 0.06, 0.06]; XF=[1, 1, 1, 1, 1, 1, 1]
          SoilWater: same as Agroforestry.Warra.TreeRow.Soil.SoilWater
          SoilNitrogen: fom_type=[default, manure, mucuna, lablab, shemp, stable]; fract_carb=[0.2, 0.3, 0.54, 0.57, 0.45, 0]; fract_cell=[0.7, 0.3, 0.37, 0.37, 0.47, 0.1]; fract_lign=[0.1, 0.4, 0.09, 0.06, 0.08, 0.9]
          SoilOrganicMatter: same as Agroforestry.Warra.TreeRow.Soil.SoilOrganicMatter
          Analysis: Thickness=[150, 150, 300, 300, 300, 300]; PH=[8, 8, 8, 8, 8, 8]; PHUnits=Water; BoronUnits=HotWater
          Sample InitialN: NO3Units=ppm; NH4Units=ppm; SWUnits=Volumetric; OCUnits=Total; PHUnits=Water
            Thickness  NO3  NH4
            150        1    0.1
            150        1    0.1
            300        1    0.1
            300        1    0.1
            300        1    0.1
            300        1    0.1
          Fertiliser
          Sample: NO3Units=ppm; NH4Units=ppm; SWUnits=Volumetric; OCUnits=Total; PHUnits=Water
            Thickness  NO3  NH4  SW
            50         1    0.1  0.32
            100        1    0.1  0.32
            150        1    0.1  0.34
            300        1    0.1  0.35
            300        1    0.1  0.38
            300        1    0.1  0.34
            300        1    0.1  0.32
          CERESSoilTemperature
        Plant Wheat: CropType=Wheat
        SoluteManager
      RectangularZone 50m: Area=0.05; Slope=0; Length=100; Width=5
        Report: same as Agroforestry.Warra.5m.Report
        Fertiliser
        SurfaceOrganicMatter: same as Agroforestry.Warra.TreeRow.SurfaceOrganicMatter
        Soil: same as Agroforestry.Warra.40m.Soil
        Plant Wheat: CropType=Wheat
        SoluteManager
      MicroClimate: a_interception=0; b_interception=1; c_interception=0; d_interception=0; soil_albedo=0.23; sun_angle=15; soil_heat_flux_fraction=0.4; night_interception_fraction=0.5; refheight=2; albedo=0.15; emissivity=0.96; RadIntTotal=0
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