Simulations: Version=127
  Replacements
    Plant Soybean: PlantType=Soybean; IsAlive=false; IsEnding=false; DaysAfterEnding=0
      OrganArbitrator Arbitrator
        BiomassTypeArbitrator DMArbitration
          Folder PotentialPartitioningMethods
            ReallocationMethod
            AllocateFixationMethod
            RetranslocationMethod
            SendPotentialDMAllocationsMethod
          Folder AllocationMethods
            NutrientConstrainedAllocationMethod
            DryMatterAllocationsMethod
          RelativeAllocation ArbitrationMethod
        BiomassTypeArbitrator NArbitration
          Folder PotentialPartitioningMethods
            ReallocationMethod
          Folder ActualPartitioningMethods
            AllocateFixationMethod
            RetranslocationMethod
          Folder AllocationMethods
            NitrogenAllocationsMethod
          RelativeAllocation ArbitrationMethod
          AllocateUptakesMethod
        WaterUptakeMethod
        NitrogenUptakeMethod
      Phenology
        Memo Introduction
          In the new model we simplified phenology by taking out stages that are not measurable (e.g. end of juvenile stage) and by adding new stages that are measurable (e.g. start pod).
          The new phenology follows the V/R staging system
        HourlyInterpolation VegetativeThermalTime: agregationMethod=0
          XYPairs Response: X=[10, 20, 30, 40]; Y=[0, 10, 20, 0]
          ThreeHourSin InterpolationMethod
        LinearInterpolationFunction VegetativePhotoperiodModifier
          XYPairs: X=[14.43, 21.19]; Y=[1, 0]
          Memo
            These parameters are overridden by cultivar parameter descriptions to capture the difference between individual cultivars in terms of their phenological development.  Responses shown here are only indicative.  See cultivar descriptions for more information.
          VariableReference XValue: VariableName=[Phenology].Photoperiod
        HourlyInterpolation ReproductiveThermalTime: agregationMethod=0
          XYPairs Response: X=[10, 15, 30, 40]; Y=[5, 5, 20, 0]
          ThreeHourSin InterpolationMethod
        LinearInterpolationFunction ReproductivePhotoperiodModifier: same as Replacements.Soybean.Phenology.VegetativePhotoperiodModifier
        PhaseLookup ThermalTime
          PhaseLookupValue PreEmergence: Start=Sowing; End=Emergence
            VariableReference Base: VariableName=[Phenology].VegetativeThermalTime
          PhaseLookupValue VegetativeGrowth: Start=Emergence; End=EndCanopyDevelopment
            MultiplyFunction TT
              VariableReference Base: VariableName=[Phenology].VegetativeThermalTime
              VariableReference PPModifier: VariableName=[Phenology].VegetativePhotoperiodModifier
          PhaseLookupValue ReproductiveGrowth: Start=EndCanopyDevelopment; End=HarvestRipe
            MultiplyFunction TT
              VariableReference Base: VariableName=[Phenology].ReproductiveThermalTime
              VariableReference PPModifier: VariableName=[Phenology].ReproductivePhotoperiodModifier
        PhotoperiodFunction Photoperiod: Twilight=0; DayLength=0
        GerminatingPhase Germinating: Start=Sowing; End=Germination
        EmergingPhase Emerging: ShootLag=10; ShootRate=1; Start=Germination; End=Emergence; TTForTimeStep=0
          VariableReference ThermalTime: VariableName=[Phenology].VegetativeThermalTime
        GenericPhase Vegetative: Start=Emergence; End=StartFlowering
          Constant Target: FixedValue=200
          VariableReference Progression: VariableName=[Phenology].ThermalTime
        GenericPhase EarlyFlowering: Start=StartFlowering; End=StartPodDevelopment
          Memo
            The duration of the grain filling phase has been taken from the model of Robertson et al (2002).
          Constant Target: FixedValue=200
          VariableReference Progression: VariableName=[Phenology].ThermalTime
        GenericPhase EarlyPodDevelopment: Start=StartPodDevelopment; End=StartGrainFilling
          Memo
            The duration of the grain filling phase has been taken from the model of Robertson et al (2002).
          Constant Target: FixedValue=140
          VariableReference Progression: VariableName=[Phenology].ThermalTime
        GenericPhase EarlyGrainFilling: Start=StartGrainFilling; End=EndCanopyDevelopment
          MultiplyFunction Target
            Constant FractionofGrainfilling: FixedValue=0.05
            VariableReference EntireGrainfilling
              VariableName=[Phenology].LateGrainFilling.Target.EntireGrainfillPeriod.FixedValue
          VariableReference Progression: VariableName=[Phenology].ThermalTime
        GenericPhase MidGrainFilling: Start=EndCanopyDevelopment; End=EndPodDevelopment
          MultiplyFunction Target
            Constant FractionofMidToLateGrainfilling: FixedValue=0.5
            SubtractFunction MidToLateGrainfilling
              VariableReference EntireGrainfilling
                VariableName=[Phenology].LateGrainFilling.Target.EntireGrainfillPeriod.FixedValue
              VariableReference EarlyGrainfilling: VariableName=[Phenology].EarlyGrainFilling.Target
          VariableReference Progression: VariableName=[Phenology].ThermalTime
        GenericPhase LateGrainFilling: Start=EndPodDevelopment; End=EndGrainFill
          SubtractFunction Target
            Constant EntireGrainfillPeriod: FixedValue=500
            VariableReference EarlyGrainFillingTarget: VariableName=[Phenology].EarlyGrainFilling.Target
            VariableReference MidGrainFillingTarget: VariableName=[Phenology].MidGrainFilling.Target
          VariableReference Progression: VariableName=[Phenology].ThermalTime
        GenericPhase Maturing: Start=EndGrainFill; End=Maturity
          Constant Target: FixedValue=45
          VariableReference Progression: VariableName=[Phenology].ThermalTime
        GenericPhase Ripening: Start=Maturity; End=HarvestRipe
          Constant Target: FixedValue=45
          VariableReference Progression: VariableName=[Phenology].ThermalTime
        EndPhase ReadyForHarvesting: Start=HarvestRipe; End=Unused
          VariableReference ThermalTime: VariableName=[Phenology].ThermalTime
        OnEventFunction EmergenceDAS: SetEvent=Emergence; ReSetEvent=never
          Memo
            A function is used to provide maturity date as days after sowing(DAS).
          Constant PreEventValue: FixedValue=0
          VariableReference PostEventValue: VariableName=[Plant].DaysAfterSowing
        OnEventFunction FloweringDAS: SetEvent=StartFlowering; ReSetEvent=never
          Memo
            A function is used to provide flowering date as days after sowing(DAS).
          Constant PreEventValue: FixedValue=0
          VariableReference PostEventValue: VariableName=[Plant].DaysAfterSowing
        OnEventFunction MaturityDAS: SetEvent=Maturity; ReSetEvent=never
          Memo
            A function is used to provide maturity date as days after sowing(DAS).
          Constant PreEventValue: FixedValue=0
          VariableReference PostEventValue: VariableName=[Plant].DaysAfterSowing
      SimpleLeaf Leaf: Albedo=0.25; Gsmax350=0.015; R50=150; LeafInitialisationStage=Emergence; Height=0; BaseHeight=0; Width=0; FRGR=0; PotentialEP=0; WaterDemand=0; KDead=0; LAIDead=0
        Memo Description
          Stover represents any part of the crop that is not removed at harvest (i.e not part of the product).
        RUEModel Photosynthesis
          Constant RUE: FixedValue=1.2
          WeightedTemperatureFunction FT: MaximumTemperatureWeighting=0.5
            XYPairs: X=[10, 20, 30, 40]; Y=[0, 1, 1, 0]
          LinearInterpolationFunction FVPD
            XYPairs: X=[0, 10, 50]; Y=[1, 1, 1]
            VariableReference XValue: VariableName=[Leaf].Photosynthesis.VPD
          LinearInterpolationFunction FN
            XYPairs: X=[0, 1, 1.5]; Y=[0, 1, 1]
            VariableReference XValue: VariableName=[Leaf].Fn
          LinearInterpolationFunction FW
            XYPairs: X=[0, 1]; Y=[0, 1]
            VariableReference XValue: VariableName=[Leaf].Fw
          RUECO2Function FCO2: PhotosyntheticPathway=C3
          VariableReference RadnInt: VariableName=[Leaf].RadiationIntercepted
        StomatalConductanceCO2Modifier
          VariableReference PhotosynthesisCO2Modifier: VariableName=[Leaf].Photosynthesis.FCO2
        MultiplyFunction Area
          VariableReference SLA: VariableName=[Leaf].SpecificArea
          VariableReference LeafLiveWt: VariableName=[Leaf].Live.Wt
        MinimumFunction FRGR
          VariableReference RUE_FT: VariableName=[Leaf].Photosynthesis.FT
          MinimumFunction Others
            VariableReference RUE_FN: VariableName=[Leaf].Photosynthesis.FN
            VariableReference RUE_FVPD: VariableName=[Leaf].Photosynthesis.FVPD
        LinearInterpolationFunction ExtinctionCoefficient
          XYPairs: X=[200, 1000]; Y=[0.6, 0.4]
          VariableReference XValue: VariableName=[Soybean].SowingData.RowSpacing
        LinearInterpolationFunction Tallness
          XYPairs: X=[1, 2, 3, 4, 5, 6, 9]; Y=[0, 0, 50, 400, 700, 900, 1000]
          VariableReference XValue: VariableName=[Phenology].Stage
        AccumulateFunction NodeNumber: StartStageName=Emergence; EndStageName=EndCanopyDevelopment; FractionRemovedOnCut=1; FractionRemovedOnHarvest=1; FractionRemovedOnGraze=1; FractionRemovedOnPrune=0
          DivideFunction DeltaNode
            VariableReference ThermalTime: VariableName=[Phenology].VegetativeThermalTime
            VariableReference Phyllochron: VariableName=[Leaf].Phyllochron
        Constant NReallocationFactor: FixedValue=1
          Memo
            This model assumes that all metabolic and storage N is available for reallocation from senescing leaves.
        PhaseLookup SenescenceRate
          PhaseLookupValue Vegetative: Start=Emergence; End=EndCanopyDevelopment
            Constant Rate: FixedValue=0
          PhaseLookupValue Reproductive: Start=EndCanopyDevelopment; End=Maturity
            Memo
              Leaf senescence rate is calculated to ensure that all leaves are senesced by crop maturity.
            DivideFunction Rate
              VariableReference TT: VariableName=[Phenology].ThermalTime
              SubtractFunction TTRemaining
                ExpressionFunction TTRequired
                  Expression=[Phenology].MidGrainFilling.Target + [Phenology].LateGrainFilling.Target + [Phenology].Maturing.Target
                ExpressionFunction TTComplete
                  Expression=[Phenology].MidGrainFilling.ProgressThroughPhase + [Phenology].LateGrainFilling.ProgressThroughPhase + [Phenology].Maturing.ProgressThroughPhase
        Constant DetachmentRate: FixedValue=1; Units=/d
        Constant InitialWt: FixedValue=1
        Constant LaiDead: FixedValue=0; Units=m^2/m^2
        LinearInterpolationFunction MaximumNConc
          XYPairs: X=[3, 4, 9]; Y=[0.06, 0.05, 0.03]
          VariableReference XValue: VariableName=[Phenology].Stage
        LinearInterpolationFunction CriticalNConc
          XYPairs: X=[3, 4, 9]; Y=[0.06, 0.05, 0.03]
          VariableReference XValue: VariableName=[Phenology].Stage
        Constant MinimumNConc: FixedValue=0.02
        Constant MaintenanceRespiration: FixedValue=0; Units=0-1
        Constant DMConversionEfficiency: FixedValue=1; Units=0-1
        BiomassRemoval BiomassRemovalDefaults
          OrganBiomassRemovalType Harvest: FractionLiveToRemove=0; FractionDeadToRemove=0; FractionLiveToResidue=0.3; FractionDeadToResidue=0
          OrganBiomassRemovalType Cut: FractionLiveToRemove=0.95; FractionDeadToRemove=0; FractionLiveToResidue=0; FractionDeadToResidue=0
          OrganBiomassRemovalType Prune: FractionLiveToRemove=0; FractionDeadToRemove=0; FractionLiveToResidue=0.6; FractionDeadToResidue=0
          OrganBiomassRemovalType Graze: FractionLiveToRemove=0.6; FractionDeadToRemove=0; FractionLiveToResidue=0.1; FractionDeadToResidue=0
        Constant NRetranslocationFactor: FixedValue=0.5
        Constant DMReallocationFactor: FixedValue=0
        Constant DMRetranslocationFactor: FixedValue=0.5
        Constant RemobilisationCost: FixedValue=0
        Constant CarbonConcentration: FixedValue=0.4
        BiomassDemand DMDemands
          DivideFunction Structural
            VariableReference DeltaLAI: VariableName=[Leaf].DeltaLAI
            VariableReference SLA: VariableName=[Leaf].SpecificArea
            Memo
              Growth in leaf area is used to calculate the leaf dry matter demand.  Note that leaf biomass is assumed to consist of entirely structural dry matter.
          Constant Storage: FixedValue=0
          Constant Metabolic: FixedValue=0
        BiomassDemand NDemands
          MultiplyFunction Structural
            VariableReference MinNconc: VariableName=[Leaf].minimumNconc
            VariableReference PotentialDMAllocation: VariableName=[Leaf].potentialDMAllocation.Structural
          MultiplyFunction Metabolic
            SubtractFunction MetabolicNconc
              VariableReference CritNconc: VariableName=[Leaf].criticalNConc
              VariableReference MinNconc: VariableName=[Leaf].minimumNconc
            VariableReference PotentialDMAllocation: VariableName=[Leaf].potentialDMAllocation.Structural
          StorageNDemandFunction Storage
            Constant NitrogenDemandSwitch: FixedValue=1
            VariableReference MaxNconc: VariableName=[Leaf].maximumNconc
        LinearInterpolationFunction FrostFraction
          XYPairs: X=[-4, 4]; Y=[1, 0]
          VariableReference XValue: VariableName=[Weather].MinT
        LinearInterpolationFunction SpecificArea
          XYPairs: X=[0.1, 6]; Y=[0.03, 0.03]
          VariableReference XValue: VariableName=[Leaf].LAI
        PhaseLookup DeltaLAI
          PhaseLookupValue Vegetative: Start=Emergence; End=EndCanopyDevelopment
            MultiplyFunction Delta
              VariableReference AreaLargestLeaf: VariableName=[Leaf].AreaLargestLeaf
              PhaseLookup RelativeArea
                PhaseLookupValue BeforeEndPod: Start=Emergence; End=StartPodDevelopment
                  LinearInterpolationFunction RelativeArea
                    XYPairs: X=[2, 7, 10, 18]; Y=[0.6666, 1, 1, 0.83]
                    VariableReference XValue: VariableName=[Leaf].NodeNumber
                PhaseLookupValue AfterEndPod: Start=StartPodDevelopment; End=EndCanopyDevelopment
                  Constant RelativeArea: FixedValue=0.4
              VariableReference PlantNumber: VariableName=[Soybean].SowingData.Population
              LinearInterpolationFunction Branches
                XYPairs: X=[0, 6, 7, 8, 9]; Y=[1, 1, 2, 2, 2]
                VariableReference XValue: VariableName=[Leaf].NodeNumber
              DivideFunction LAR
                VariableReference TT: VariableName=[Phenology].VegetativeThermalTime
                VariableReference Phyllochron: VariableName=[Leaf].Phyllochron
          PhaseLookupValue Reproductive: Start=EndCanopyDevelopment; End=Maturity
            Constant: FixedValue=0
        Constant AreaLargestLeaf: FixedValue=0.006
        Constant Phyllochron: FixedValue=45
      ReproductiveOrgan Grain: GrowthRespiration=0; MaintenanceRespiration=0
        Biomass Live: DMDOfStructural=0.6
        Biomass Dead: DMDOfStructural=0.6
        Constant PotentialHarvestIndex: FixedValue=0.5
        AddFunction FillingDuration
          VariableReference EarlyGrainFillingDuration: VariableName=[Phenology].EarlyGrainFilling.Target
          VariableReference MidGrainFillingDuration: VariableName=[Phenology].MidGrainFilling.Target
          VariableReference LateGrainFillingDuration: VariableName=[Phenology].LateGrainFilling.Target
        PhaseLookup DMDemandFunction
          PhaseLookupValue GrainFilling: Start=StartGrainFilling; End=EndGrainFill
            MultiplyFunction HIGrainDemand
              VariableReference AboveGroundWt: VariableName=[AboveGround].Wt
              DivideFunction HarvestIndexIncrease
                VariableReference PotentialHarvestIndex: VariableName=[Grain].PotentialHarvestIndex
                VariableReference FillingDuration: VariableName=[Grain].FillingDuration
              VariableReference ThermalTime: VariableName=[Phenology].ThermalTime
        Constant MinimumNConc: FixedValue=0.05
        Constant MaximumNConc: FixedValue=0.058
        Constant WaterContent: FixedValue=0.12
        MultiplyFunction NFillingRate
          VariableReference NConc: VariableName=[Grain].MaximumNConc
          VariableReference DMDemand: VariableName=[Grain].DMDemandFunction
          VariableReference DMConversionEfficiency: VariableName=[Grain].DMConversionEfficiency
        BiomassRemoval BiomassRemovalDefaults
          OrganBiomassRemovalType Harvest: FractionLiveToRemove=1; FractionDeadToRemove=0; FractionLiveToResidue=0; FractionDeadToResidue=0
          OrganBiomassRemovalType Cut: FractionLiveToRemove=1; FractionDeadToRemove=0; FractionLiveToResidue=0; FractionDeadToResidue=0
          OrganBiomassRemovalType Prune: FractionLiveToRemove=0; FractionDeadToRemove=0; FractionLiveToResidue=0.8; FractionDeadToResidue=0
          OrganBiomassRemovalType Graze: FractionLiveToRemove=0.6; FractionDeadToRemove=0; FractionLiveToResidue=0.2; FractionDeadToResidue=0
        Constant DMConversionEfficiency: FixedValue=0.89
        Constant RemobilisationCost: FixedValue=0
        Constant CarbonConcentration: FixedValue=0.4
        DivideFunction HarvestIndex
          VariableReference GrainWt: VariableName=[Grain].Wt
          VariableReference AboveGroundWt: VariableName=[AboveGround].Wt
        Constant MaximumPotentialGrainSize: FixedValue=0
          Memo
            This parameter is not used.  Grain growth is calculated from harvest index increase.
        Constant NumberFunction: FixedValue=0
          Memo
            Grain number is not estimated by this model.
      Root: GrowthRespiration=0; MaintenanceRespiration=0
        RootShapeCylindre RootShape
        LinearInterpolationFunction KLModifier
          XYPairs: X=[0, 3]; Y=[1, 1]
          VariableReference XValue: VariableName=[Leaf].LAI
        HourlyInterpolation TemperatureEffect: agregationMethod=0
          XYPairs Response: X=[0, 26, 35]; Y=[1, 1, 1]
          ThreeHourSin InterpolationMethod
        LinearInterpolationFunction MaxDailyNUptake
          XYPairs: X=[0, 5]; Y=[1, 3]
          VariableReference XValue: VariableName=[Leaf].LAI
        Constant SenescenceRate: FixedValue=0.005
        Constant MaximumRootDepth: FixedValue=1000000
        PhaseLookup RootFrontVelocity
          PhaseLookupValue PreEmergence: Start=Germination; End=Emergence
            Constant Function: FixedValue=5
          PhaseLookupValue early: Start=Emergence; End=StartGrainFilling
            Constant Function: FixedValue=30
          PhaseLookupValue late: Start=StartGrainFilling; End=Maturity
            Constant Function: FixedValue=5
        Constant MaximumNConc: FixedValue=0.01
        Constant MinimumNConc: FixedValue=0.005
        PhaseLookupValue NitrogenDemandSwitch: Start=Emergence; End=EndGrainFill
          Constant: FixedValue=1
        LinearInterpolationFunction KNO3
          XYPairs: X=[0, 0.003]; Y=[0.02, 0.02]
          VariableReference XValue: VariableName=[Root].LengthDensity
        LinearInterpolationFunction KNH4
          XYPairs: X=[0, 0.003]; Y=[0, 0]
          VariableReference XValue: VariableName=[Root].LengthDensity
        BiomassRemoval BiomassRemovalDefaults
          OrganBiomassRemovalType Harvest: FractionLiveToRemove=0; FractionDeadToRemove=0; FractionLiveToResidue=0.2; FractionDeadToResidue=0
          OrganBiomassRemovalType Cut: FractionLiveToRemove=0; FractionDeadToRemove=0; FractionLiveToResidue=0.3; FractionDeadToResidue=0
          OrganBiomassRemovalType Prune: FractionLiveToRemove=0; FractionDeadToRemove=0; FractionLiveToResidue=0.1; FractionDeadToResidue=0
          OrganBiomassRemovalType Graze: FractionLiveToRemove=0; FractionDeadToRemove=0; FractionLiveToResidue=0.15; FractionDeadToResidue=0
        LinearInterpolationFunction NUptakeSWFactor
          XYPairs: X=[0, 1]; Y=[0, 1]
          VariableReference XValue: VariableName=[Root].RWC
        Constant SpecificRootLength: FixedValue=40; Units=m/g
        Constant DMConversionEfficiency: FixedValue=1
        Constant MaintenanceRespirationFunction: FixedValue=1
        Constant RemobilisationCost: FixedValue=0
        Constant CarbonConcentration: FixedValue=0.4
        BiomassDemand DMDemands
          MultiplyFunction Structural
            PartitionFractionDemandFunction DMDemandFunction
              PhaseLookup PartitionFraction
                PhaseLookupValue Early: Start=Emergence; End=StartFlowering
                  Constant Function: FixedValue=0.2
                PhaseLookupValue Middle: Start=StartFlowering; End=StartGrainFilling
                  Constant Function: FixedValue=0.2
                PhaseLookupValue Late: Start=StartGrainFilling; End=Maturity
                  Constant Function: FixedValue=0.05
            Constant StructuralFraction: FixedValue=1
          Constant Metabolic: FixedValue=0
          StorageDMDemandFunction Storage
            SubtractFunction StorageFraction
              Constant One: FixedValue=1
              VariableReference StructuralFraction: VariableName=[Root].DMDemands.Structural.StructuralFraction
        BiomassDemand NDemands
          MultiplyFunction Structural
            VariableReference MinNconc: VariableName=[Root].minimumNconc
            VariableReference PotentialDMAllocation: VariableName=[Root].potentialDMAllocation.Structural
          MultiplyFunction Metabolic
            SubtractFunction MetabolicNconc
              VariableReference CritNconc: VariableName=[Root].criticalNConc
              VariableReference MinNconc: VariableName=[Root].minimumNconc
            VariableReference PotentialDMAllocation: VariableName=[Root].potentialDMAllocation.Structural
          StorageNDemandFunction Storage
            VariableReference NitrogenDemandSwitch: VariableName=[Root].nitrogenDemandSwitch
            VariableReference MaxNconc: VariableName=[Root].maximumNconc
        VariableReference CriticalNConc: VariableName=[Root].MinimumNConc
        BiomassDemand InitialWt
          Constant Structural: FixedValue=0.2; Units=g/plant
          Constant Metabolic: FixedValue=0
          Constant Storage: FixedValue=0
        Constant RootDepthStressFactor: FixedValue=1
      Nodule
        Constant FixationMetabolicCost: FixedValue=0
        Constant MaximumNConc: FixedValue=0.02
        Constant MinimumNConc: FixedValue=0.01
        Constant SenescenceRate: FixedValue=0
        Constant NReallocationFactor: FixedValue=0
        PhaseLookupValue NitrogenDemandSwitch: Start=Emergence; End=EndGrainFill
          Constant: FixedValue=1
        BiomassRemoval BiomassRemovalDefaults
          OrganBiomassRemovalType Harvest: FractionLiveToRemove=0.5; FractionDeadToRemove=0; FractionLiveToResidue=0.1; FractionDeadToResidue=0
          OrganBiomassRemovalType Cut: FractionLiveToRemove=0.8; FractionDeadToRemove=0; FractionLiveToResidue=0; FractionDeadToResidue=0
          OrganBiomassRemovalType Prune: FractionLiveToRemove=0; FractionDeadToRemove=0; FractionLiveToResidue=0.6; FractionDeadToResidue=0
          OrganBiomassRemovalType Graze: FractionLiveToRemove=0.6; FractionDeadToRemove=0; FractionLiveToResidue=0.2; FractionDeadToResidue=0
        Constant InitialWtFunction: FixedValue=0; Units=g/m^2
        Constant DetachmentRateFunction: FixedValue=0; Units=/d
        Constant MaintenanceRespirationFunction: FixedValue=0; Units=0-1
        Constant DMConversionEfficiency: FixedValue=1; Units=0-1
        Constant NRetranslocationFactor: FixedValue=0
        Constant DMReallocationFactor: FixedValue=0
        Constant DMRetranslocationFactor: FixedValue=0
        VariableReference CriticalNConc: VariableName=[Nodule].MinimumNConc
        Constant RemobilisationCost: FixedValue=0
        Constant CarbonConcentration: FixedValue=0.4
        HoldFunction FixationRate: WhenToHold=StartGrainFilling
          MinimumFunction DailyPotentialFixationRate
            MultiplyFunction PotentialFixationRate
              VariableReference LiveBiomass: VariableName=[AboveGroundLive].Wt
              PhaseLookup SpecificFixationRate
                PhaseLookupValue VegetativeGrowth: Start=Emergence; End=StartFlowering
                  Constant Rate: FixedValue=0.006
                PhaseLookupValue ReproductiveGrowth: Start=StartFlowering; End=EndGrainFill
                  Constant Rate: FixedValue=0.002
            Constant MaximumFixationRate: FixedValue=0.6
        BiomassDemand DMDemands
          MultiplyFunction Structural
            PartitionFractionDemandFunction DMDemandFunction
              PhaseLookup PartitionFraction
                PhaseLookupValue Early: Start=Emergence; End=StartFlowering
                  Constant Function: FixedValue=0.03
                PhaseLookupValue Middle: Start=StartFlowering; End=StartGrainFilling
                  Constant Function: FixedValue=0.02
                PhaseLookupValue Late: Start=StartGrainFilling; End=Maturity
                  Constant Function: FixedValue=0
            Constant StructuralFraction: FixedValue=1; Units=g/g
          Constant Metabolic: FixedValue=0
          StorageDMDemandFunction Storage
            SubtractFunction StorageFraction
              Constant One: FixedValue=1
              VariableReference StructuralFraction: VariableName=[Nodule].DMDemands.Structural.StructuralFraction
        BiomassDemand NDemands
          MultiplyFunction Structural
            VariableReference MinNconc: VariableName=[Nodule].minimumNconc
            VariableReference PotentialDMAllocation: VariableName=[Nodule].potentialDMAllocation.Structural
          MultiplyFunction Metabolic
            SubtractFunction MetabolicNconc
              VariableReference CritNconc: VariableName=[Nodule].criticalNConc
              VariableReference MinNconc: VariableName=[Nodule].minimumNconc
            VariableReference PotentialDMAllocation: VariableName=[Nodule].potentialDMAllocation.Structural
          StorageNDemandFunction Storage
            VariableReference NitrogenDemandSwitch: VariableName=[Nodule].nitrogenDemandSwitch
            VariableReference MaxNconc: VariableName=[Nodule].maximumNconc
      GenericOrgan Shell: IsAboveGround=true
        Constant NReallocationFactor: FixedValue=1
        Constant NRetranslocationFactor: FixedValue=0.5
        Constant MaximumNConc: FixedValue=0.045
        VariableReference CriticalNConc: VariableName=[Shell].MinimumNConc
        Constant MinimumNConc: FixedValue=0.01
        Constant DMRetranslocationFactor: FixedValue=0.1
        PhaseLookupValue NitrogenDemandSwitch: Start=StartPodDevelopment; End=EndPodDevelopment
          Constant: FixedValue=1
        BiomassRemoval BiomassRemovalDefaults: same as Replacements.Soybean.Nodule.BiomassRemovalDefaults
        PhaseLookup SenescenceRate
          PhaseLookupValue ReproductivePhase: Start=StartPodDevelopment; End=Maturity
            MinimumFunction Rate
              DivideFunction Fraction
                VariableReference TT: VariableName=[Phenology].ThermalTime
                SubtractFunction TTRemaining
                  ExpressionFunction ReproductiveTT
                    Expression=[Phenology].EarlyPodDevelopment.Target+[Phenology].EarlyGrainFilling.Target+[Phenology].MidGrainFilling.Target+[Phenology].LateGrainFilling.Target
                  ExpressionFunction ReproductiveTT1Complete
                    Expression=[Phenology].EarlyPodDevelopment.ProgressThroughPhase+[Phenology].EarlyGrainFilling.ProgressThroughPhase+[Phenology].MidGrainFilling.ProgressThroughPhase+[Phenology].LateGrainFilling.ProgressThroughPhase
              Constant One: FixedValue=1
        Constant DetachmentRateFunction: FixedValue=0; Units=/d
        Constant MaintenanceRespirationFunction: FixedValue=0; Units=0-1
        Constant DMConversionEfficiency: FixedValue=1; Units=0-1
        Constant DMReallocationFactor: FixedValue=0
        Constant RemobilisationCost: FixedValue=0
        Constant CarbonConcentration: FixedValue=0.4
        Constant PotentialHarvestIndex: FixedValue=0.2
        AddFunction FillingDuration
          VariableReference EarlyPodDevelopmentDuration: VariableName=[Phenology].EarlyPodDevelopment.Target
          VariableReference EarlyGrainFillingDuration: VariableName=[Phenology].EarlyGrainFilling.Target
          VariableReference MidGrainFillingDuration: VariableName=[Phenology].MidGrainFilling.Target
        BiomassDemand DMDemands
          MultiplyFunction Structural
            PhaseLookup DMDemandFunction
              PhaseLookupValue PodDevelopment: Start=StartPodDevelopment; End=EndPodDevelopment
                MultiplyFunction HIPodDemand
                  VariableReference AboveGroundWt: VariableName=[AboveGround].Wt
                  DivideFunction HarvestIndexIncrease
                    VariableReference PotentialHarvestIndex: VariableName=[Shell].PotentialHarvestIndex
                    VariableReference FillingDuration: VariableName=[Shell].FillingDuration
                  VariableReference ThermalTime: VariableName=[Phenology].ThermalTime
            Constant StructuralFraction: FixedValue=1
          Constant Metabolic: FixedValue=0
          StorageDMDemandFunction Storage
            SubtractFunction StorageFraction
              Constant One: FixedValue=1
              VariableReference StructuralFraction: VariableName=[Shell].DMDemands.Structural.StructuralFraction
        BiomassDemand NDemands
          MultiplyFunction Structural
            VariableReference MinNconc: VariableName=[Shell].minimumNconc
            VariableReference PotentialDMAllocation: VariableName=[Shell].potentialDMAllocation.Structural
          StorageNDemandFunction Storage
            VariableReference NitrogenDemandSwitch: VariableName=[Shell].nitrogenDemandSwitch
            VariableReference MaxNconc: VariableName=[Shell].maximumNconc
          Constant Metabolic: FixedValue=0
        RetranslocateNonStructural RetranslocateNitrogen
        BiomassDemand InitialWt
          Constant Structural: FixedValue=0; Units=g/m^2
          Constant Metabolic: FixedValue=0
          Constant Storage: FixedValue=0
      GenericOrgan Stem: IsAboveGround=true
        Constant NReallocationFactor: FixedValue=1
        Constant NRetranslocationFactor: FixedValue=0.5
        PhaseLookup DMRetranslocationFactor
          PhaseLookupValue GrainFilling: Start=EndCanopyDevelopment; End=EndGrainFill
            Constant RetranslocationFactor: FixedValue=0.2
        LinearInterpolationFunction MaximumNConc
          XYPairs: X=[3, 4, 5]; Y=[0.025, 0.02, 0.015]
          VariableReference XValue: VariableName=[Phenology].Stage
        Constant MinimumNConc: FixedValue=0.006
        PhaseLookupValue NitrogenDemandSwitch: Start=Emergence; End=StartGrainFilling
          Constant: FixedValue=1
        BiomassRemoval BiomassRemovalDefaults: same as Replacements.Soybean.Nodule.BiomassRemovalDefaults
        PhaseLookup SenescenceRate
          PhaseLookupValue PostCanopyPhase: Start=EndCanopyDevelopment; End=Maturity
            MinimumFunction Rate
              DivideFunction Fraction
                VariableReference TT: VariableName=[Phenology].ThermalTime
                SubtractFunction TTRemaining
                  ExpressionFunction PostCanopyTT
                    Expression=[Phenology].EarlyPodDevelopment.Target+[Phenology].EarlyGrainFilling.Target+[Phenology].MidGrainFilling.Target+[Phenology].LateGrainFilling.Target
                  ExpressionFunction PostCanopyTTComplete
                    Expression=[Phenology].MidGrainFilling.ProgressThroughPhase+[Phenology].LateGrainFilling.ProgressThroughPhase
              Constant One: FixedValue=1
        Constant DetachmentRateFunction: FixedValue=0; Units=/d
        Constant MaintenanceRespirationFunction: FixedValue=0; Units=0-1
        Constant DMConversionEfficiency: FixedValue=1; Units=0-1
        Constant DMReallocationFactor: FixedValue=0
        VariableReference CriticalNConc: VariableName=[Stem].MinimumNConc
        Constant RemobilisationCost: FixedValue=0
        Constant CarbonConcentration: FixedValue=0.4
        BiomassDemand DMDemands
          MultiplyFunction Structural
            PhaseLookup Fraction
              PhaseLookupValue StemGrowthPhase: Start=Emergence; End=StartPodDevelopment
                Constant Fraction: FixedValue=0.75
              PhaseLookupValue PodAndGrainGrowth: Start=StartPodDevelopment; End=EndGrainFill
                Constant Fraction: FixedValue=0
            VariableReference DMDemand: VariableName=[Stem].PotentialGrowth
          Constant Metabolic: FixedValue=0
          MultiplyFunction Storage
            VariableReference DMDemand: VariableName=[Stem].PotentialGrowth
            SubtractFunction StorageFraction
              Constant One: FixedValue=1
              VariableReference StructuralFraction: VariableName=[Stem].DMDemands.Structural.Fraction
        BiomassDemand NDemands
          MultiplyFunction Structural
            VariableReference MinNconc: VariableName=[Stem].minimumNconc
            VariableReference PotentialDMAllocation: VariableName=[Stem].potentialDMAllocation.Structural
          MultiplyFunction Metabolic
            SubtractFunction MetabolicNconc
              VariableReference CritNconc: VariableName=[Stem].criticalNConc
              VariableReference MinNconc: VariableName=[Stem].minimumNconc
            VariableReference PotentialDMAllocation: VariableName=[Stem].potentialDMAllocation.Structural
          StorageNDemandFunction Storage
            VariableReference NitrogenDemandSwitch: VariableName=[Stem].nitrogenDemandSwitch
            VariableReference MaxNconc: VariableName=[Stem].maximumNconc
        PartitionFractionDemandFunction PotentialGrowth
          PhaseLookup PartitionFraction
            PhaseLookupValue StemGrowthPhase: Start=Emergence; End=EndPodDevelopment
              Constant StemFraction: FixedValue=0.4
            PhaseLookupValue GrainFilling: Start=EndPodDevelopment; End=EndGrainFill
              Constant StemFraction: FixedValue=0
        RetranslocateNonStructural RetranslocateNitrogen
        BiomassDemand InitialWt
          Constant Structural: FixedValue=0; Units=g/m^2
          Constant Metabolic: FixedValue=0
          Constant Storage: FixedValue=0
      CompositeBiomass AboveGround: DMDOfStructural=0.6
        Propertys=[[Leaf].Live, [Leaf].Dead, [Stem].Live, [Stem].Dead, [Grain].Live, [Grain].Dead, [Shell].Live, [Shell].Dead]
      CompositeBiomass BelowGround: Propertys=[[Root].Live, [Root].Dead, [Nodule].Live, [Nodule].Dead]; DMDOfStructural=0.6
      CompositeBiomass AboveGroundLive: Propertys=[[Leaf].Live, [Stem].Live, [Grain].Live, [Shell].Live]; DMDOfStructural=0.6
      CompositeBiomass Total: DMDOfStructural=0.6
        Propertys=[[Leaf].Live, [Leaf].Dead, [Stem].Live, [Stem].Dead, [Grain].Live, [Grain].Dead, [Shell].Live, [Shell].Dead, [Root].Live, [Root].Dead, [Nodule].Live, [Nodule].Dead]
      CompositeBiomass TotalLive: DMDOfStructural=0.6
        Propertys=[[Leaf].Live, [Stem].Live, [Grain].Live, [Shell].Live, [Root].Live, [Nodule].Live]
      CompositeBiomass TotalDead: DMDOfStructural=0.6
        Propertys=[[Leaf].Dead, [Stem].Dead, [Grain].Dead, [Shell].Dead, [Root].Dead, [Nodule].Dead]
      CompositeBiomass Pod: Propertys=[[Shell].Live, [Shell].Dead, [Grain].Live, [Grain].Dead]; DMDOfStructural=0.6
      Memo
        ## References

        ### **Ayaz S, McKenzie BA, McNeil DL, Hill GD.** **2004**. Light interception and utilization of four grain legumes sown at different plant populations and depths. _Journal of Agricultural Science,_ **142**: 297-308.
         **Ayaz S, McKenzie BA, Hill GD, McNeil DL.** **2004**. Variability in yield of four grain legume species in a subhumid temperate environment. II. Yield components. _Journal of Agricultural Science,_ **142**: 21-28.
         **Ayaz S, McKenzie BA, Hill GD, McNeil DL.** **2004**. Nitrogen distribution in four grain legumes. _Journal of Agricultural Science,_ **142**: 309-317.
         **Wilson DR, Robertson MJ.** **1996.** Pea phenology responses to temperature and photoperiod. _Australian Agronomy Society_.
      CultivarFolder Australia
        Cultivar Buchanan
          Command:
            [Phenology].Vegetative.Target.FixedValue = 480
            [Phenology].EarlyFlowering.Target.FixedValue = 100
            [Phenology].EarlyGrainFilling.Target.FractionofGrainfilling.FixedValue = 0.015
            [Phenology].LateGrainFilling.Target.EntireGrainfillPeriod.FixedValue = 467
            [Phenology].VegetativePhotoperiodModifier.XYPairs.X = 12.39, 15.61
            [Phenology].ReproductivePhotoperiodModifier.XYPairs.X = 12.39, 15.61
            [Phenology].MidGrainFilling.Target.FractionofMidToLateGrainfilling.FixedValue=0.33
            [Grain].MaximumNConc.FixedValue = 0.067
            [Stem].PotentialGrowth.PartitionFraction.StemGrowthPhase.StemFraction.FixedValue = 0.5
            [Leaf].AreaLargestLeaf.FixedValue=0.009
        Cultivar Djakal
          Command:
            [Phenology].Vegetative.Target.FixedValue = 380
            [Phenology].EarlyFlowering.Target.FixedValue = 100
            [Phenology].EarlyGrainFilling.Target.FractionofGrainfilling.FixedValue = 0.05
            [Phenology].LateGrainFilling.Target.EntireGrainfillPeriod.FixedValue = 405
            [Phenology].VegetativePhotoperiodModifier.XYPairs.X = 13.75, 17
            [Phenology].ReproductivePhotoperiodModifier.XYPairs.X = 11.9, 15.5
            [Leaf].AreaLargestLeaf.FixedValue=0.009
        Cultivar Davis
          Command:
            [Phenology].Vegetative.Target.FixedValue = 480
            [Phenology].EarlyFlowering.Target.FixedValue = 100
            [Phenology].EarlyGrainFilling.Target.FractionofGrainfilling.FixedValue = 0.015
            [Phenology].LateGrainFilling.Target.EntireGrainfillPeriod.FixedValue = 467
            [Phenology].VegetativePhotoperiodModifier.XYPairs.X = 12.39, 15.61
            [Phenology].ReproductivePhotoperiodModifier.XYPairs.X = 12.39, 15.61
            [Phenology].MidGrainFilling.Target.FractionofMidToLateGrainfilling.FixedValue=0.33
            [Grain].MaximumNConc.FixedValue = 0.067
            [Stem].PotentialGrowth.PartitionFraction.StemGrowthPhase.StemFraction.FixedValue = 0.5
            [Leaf].AreaLargestLeaf.FixedValue=0.012
        Cultivar Hooper_MG40
          Command:
            [Phenology].Vegetative.Target.FixedValue = 380
            [Phenology].EarlyFlowering.Target.FixedValue = 80
            [Phenology].EarlyGrainFilling.Target.FractionofGrainfilling.FixedValue = 0.05
            [Phenology].LateGrainFilling.Target.EntireGrainfillPeriod.FixedValue = 440
            [Phenology].VegetativePhotoperiodModifier.XYPairs.X = 13.26, 16.67
            [Phenology].ReproductivePhotoperiodModifier.XYPairs.X = 13.26, 16.67
            [Leaf].AreaLargestLeaf.FixedValue=0.009
        Cultivar Stephens_MG40
          Command:
            [Phenology].Vegetative.Target.FixedValue = 360
            [Phenology].EarlyFlowering.Target.FixedValue = 80
            [Phenology].EarlyGrainFilling.Target.FractionofGrainfilling.FixedValue = 0.05
            [Phenology].LateGrainFilling.Target.EntireGrainfillPeriod.FixedValue = 440
            [Phenology].VegetativePhotoperiodModifier.XYPairs.X = 13.26, 16.67
            [Phenology].ReproductivePhotoperiodModifier.XYPairs.X = 13.26, 16.67
            [Leaf].AreaLargestLeaf.FixedValue=0.009
        Cultivar FiskebyV
          Command:
            [Phenology].Vegetative.Target.FixedValue = 285
            [Phenology].EarlyFlowering.Target.FixedValue = 80
            [Phenology].EarlyGrainFilling.Target.FractionofGrainfilling.FixedValue = 0.05
            [Phenology].LateGrainFilling.Target.EntireGrainfillPeriod.FixedValue = 405
            [Phenology].VegetativePhotoperiodModifier.XYPairs.X = 13.75, 18
            [Phenology].ReproductivePhotoperiodModifier.XYPairs.X = 13.75, 18
          Memo
            Early-maturing, photoperiod-insensitive cultivar developed in Sweden for high latitude environments
        Cultivar F148_7
          Command:
            [Phenology].Vegetative.Target.FixedValue = 314
            [Phenology].EarlyFlowering.Target.FixedValue = 80
            [Phenology].EarlyGrainFilling.Target.FractionofGrainfilling.FixedValue = 0.05
            [Phenology].LateGrainFilling.Target.EntireGrainfillPeriod.FixedValue = 485
            [Phenology].VegetativePhotoperiodModifier.XYPairs.X = 13.75, 17
            [Phenology].ReproductivePhotoperiodModifier.XYPairs.X = 12, 18
            [Leaf].AreaLargestLeaf.FixedValue=0.009
          Memo
            Indeterminate breeding selection from the national soybean breeding program combining phytophthora resistance, earliness,
            culinary quality, and yield
        Cultivar Bowyer
          Command:
            [Phenology].Vegetative.Target.FixedValue = 377
            [Phenology].EarlyFlowering.Target.FixedValue = 80
            [Phenology].EarlyGrainFilling.Target.FractionofGrainfilling.FixedValue = 0.05
            [Phenology].LateGrainFilling.Target.EntireGrainfillPeriod.FixedValue = 405
            [Phenology].VegetativePhotoperiodModifier.XYPairs.X = 13.75, 15.5
            [Phenology].ReproductivePhotoperiodModifier.XYPairs.X = 11.9, 15.5
          Memo
            Brown hilum cultivar, adapted to southern New South Wales, released by K McWhirter in 1982
        Cultivar Bunya
          Command:
            [Phenology].Vegetative.Target.FixedValue = 550
            [Phenology].EarlyFlowering.Target.FixedValue = 80
            [Phenology].EarlyGrainFilling.Target.FractionofGrainfilling.FixedValue = 0.05
            [Phenology].LateGrainFilling.Target.EntireGrainfillPeriod.FixedValue = 405
            [Phenology].VegetativePhotoperiodModifier.XYPairs.X = 13.75, 18
            [Phenology].ReproductivePhotoperiodModifier.XYPairs.X = 10.9, 15.5
            [Leaf].AreaLargestLeaf.FixedValue=0.009
          Memo
            Culinary cultivar released in 2006 by CSIRO with broad adaptation from northern New South Wales to northern Queensland
        Cultivar Cowrie
          Command:
            [Phenology].Vegetative.Target.FixedValue = 390
            [Phenology].EarlyFlowering.Target.FixedValue = 80
            [Phenology].EarlyGrainFilling.Target.FractionofGrainfilling.FixedValue = 0.05
            [Phenology].LateGrainFilling.Target.EntireGrainfillPeriod.FixedValue = 425
            [Phenology].VegetativePhotoperiodModifier.XYPairs.X = 12.75, 16
            [Phenology].ReproductivePhotoperiodModifier.XYPairs.X = 12.75, 16
            [Leaf].AreaLargestLeaf.FixedValue=0.009
          Memo
            Light hilum cultivar released by theNewSouth Wales Department of Agriculture for the coastal Northern Rivers District inNewSouth Wales
        Cultivar Soya791
          Command:
            [Phenology].Vegetative.Target.FixedValue = 430
            [Phenology].EarlyFlowering.Target.FixedValue = 80
            [Phenology].EarlyGrainFilling.Target.FractionofGrainfilling.FixedValue = 0.05
            [Phenology].LateGrainFilling.Target.EntireGrainfillPeriod.FixedValue = 425
            [Phenology].VegetativePhotoperiodModifier.XYPairs.X = 12.75, 15.3
            [Phenology].ReproductivePhotoperiodModifier.XYPairs.X = 12.75, 15.3
            [Leaf].AreaLargestLeaf.FixedValue=0.009
        Cultivar Manark
          Command:
            [Phenology].Vegetative.Target.FixedValue = 440
            [Phenology].EarlyFlowering.Target.FixedValue = 80
            [Phenology].EarlyGrainFilling.Target.FractionofGrainfilling.FixedValue = 0.05
            [Phenology].LateGrainFilling.Target.EntireGrainfillPeriod.FixedValue = 425
            [Phenology].VegetativePhotoperiodModifier.XYPairs.X = 12.75, 15
            [Phenology].ReproductivePhotoperiodModifier.XYPairs.X = 12.75, 15
            [Leaf].AreaLargestLeaf.FixedValue=0.009
        Cultivar Warrigal
          Command:
            [Phenology].Vegetative.Target.FixedValue = 490
            [Phenology].EarlyFlowering.Target.FixedValue = 80
            [Phenology].EarlyGrainFilling.Target.FractionofGrainfilling.FixedValue = 0.05
            [Phenology].LateGrainFilling.Target.EntireGrainfillPeriod.FixedValue = 425
            [Phenology].VegetativePhotoperiodModifier.XYPairs.X = 12.75, 15
            [Phenology].ReproductivePhotoperiodModifier.XYPairs.X = 12.75, 15
            [Leaf].AreaLargestLeaf.FixedValue=0.009
        Cultivar Leichhardt
          Command:
            [Phenology].Vegetative.Target.FixedValue = 806
            [Phenology].EarlyFlowering.Target.FixedValue = 80
            [Phenology].EarlyGrainFilling.Target.FractionofGrainfilling.FixedValue = 0.05
            [Phenology].LateGrainFilling.Target.EntireGrainfillPeriod.FixedValue = 425
            [Phenology].VegetativePhotoperiodModifier.XYPairs.X = 12.75, 14.7
            [Phenology].ReproductivePhotoperiodModifier.XYPairs.X = 12.75, 14.7
            [Leaf].AreaLargestLeaf.FixedValue=0.009
        Cultivar Djakal1
          Command:
            [Phenology].Vegetative.Target.FixedValue = 332
            [Phenology].EarlyFlowering.Target.FixedValue = 80
            [Phenology].EarlyGrainFilling.Target.FractionofGrainfilling.FixedValue = 0.05
            [Phenology].LateGrainFilling.Target.EntireGrainfillPeriod.FixedValue = 440
            [Phenology].VegetativePhotoperiodModifier.XYPairs.X = 13.26, 16.67
            [Phenology].ReproductivePhotoperiodModifier.XYPairs.X = 13.26, 16.67
            [Leaf].AreaLargestLeaf.FixedValue=0.009
      CultivarFolder USA
        Cultivar Trial_MG00
          Command:
            [Phenology].Vegetative.Target.FixedValue = 268
            [Phenology].EarlyFlowering.Target.FixedValue = 76
            [Phenology].EarlyGrainFilling.Target.FractionofGrainfilling.FixedValue = 0.05
            [Phenology].LateGrainFilling.Target.EntireGrainfillPeriod.FixedValue = 432
            [Phenology].VegetativePhotoperiodModifier.XYPairs.X = 14.43, 21.19
            [Phenology].ReproductivePhotoperiodModifier.XYPairs.X = 14.43, 21.19
        Cultivar Lambert_MG0
          Command:
            [Phenology].Vegetative.Target.FixedValue = 294
            [Phenology].EarlyFlowering.Target.FixedValue = 81
            [Phenology].EarlyGrainFilling.Target.FractionofGrainfilling.FixedValue = 0.05
            [Phenology].LateGrainFilling.Target.EntireGrainfillPeriod.FixedValue = 442
            [Phenology].VegetativePhotoperiodModifier.XYPairs.X = 14.29, 20.14
            [Phenology].ReproductivePhotoperiodModifier.XYPairs.X = 14.29, 20.14
        Cultivar IA1006_MG10
          Command:
            [Phenology].Vegetative.Target.FixedValue = 336
            [Phenology].EarlyFlowering.Target.FixedValue = 118
            [Phenology].EarlyGrainFilling.Target.FractionofGrainfilling.FixedValue = 0.05
            [Phenology].LateGrainFilling.Target.EntireGrainfillPeriod.FixedValue = 518
            [Phenology].VegetativePhotoperiodModifier.XYPairs.X = 14.37, 19.30
            [Phenology].ReproductivePhotoperiodModifier.XYPairs.X = 14.37, 19.30
        Cultivar IA2008_MG20
          Command:
            [Phenology].Vegetative.Target.FixedValue = 329
            [Phenology].EarlyFlowering.Target.FixedValue = 150
            [Phenology].EarlyGrainFilling.Target.FractionofGrainfilling.FixedValue = 0.05
            [Phenology].LateGrainFilling.Target.EntireGrainfillPeriod.FixedValue = 580
            [Phenology].VegetativePhotoperiodModifier.XYPairs.X = 13.92, 17.93
            [Phenology].ReproductivePhotoperiodModifier.XYPairs.X = 13.92, 17.93
        Cultivar PioneerP22T61_MG22
          Command:
            [Phenology].Vegetative.Target.FixedValue = 328
            [Phenology].EarlyFlowering.Target.FixedValue = 106
            [Phenology].EarlyGrainFilling.Target.FractionofGrainfilling.FixedValue = 0.3
            [Phenology].LateGrainFilling.Target.EntireGrainfillPeriod.FixedValue = 499
            [Phenology].VegetativePhotoperiodModifier.XYPairs.X = 13.59, 17.6
            [Phenology].ReproductivePhotoperiodModifier.XYPairs.X = 13.59, 17.6
        Cultivar PioneerP22T69R_MG22
          Command:
            [Phenology].Vegetative.Target.FixedValue = 328
            [Phenology].EarlyFlowering.Target.FixedValue = 106
            [Phenology].EarlyGrainFilling.Target.FractionofGrainfilling.FixedValue = 0.35
            [Phenology].LateGrainFilling.Target.EntireGrainfillPeriod.FixedValue = 580
            [Phenology].VegetativePhotoperiodModifier.XYPairs.X = 13.59, 17.6
            [Phenology].ReproductivePhotoperiodModifier.XYPairs.X = 13.59, 17.6
        Cultivar Pioneer92MGI_MG26
          Command:
            [Phenology].Vegetative.Target.FixedValue = 271
            [Phenology].EarlyFlowering.Target.FixedValue = 120
            [Phenology].EarlyGrainFilling.Target.FractionofGrainfilling.FixedValue = 0.125
            [Phenology].LateGrainFilling.Target.EntireGrainfillPeriod.FixedValue = 529
            [Phenology].VegetativePhotoperiodModifier.XYPairs.X = 13.77, 17.57
            [Phenology].ReproductivePhotoperiodModifier.XYPairs.X = 13.77, 17.57
        Cultivar PioneerP92Y75_MG27
          Command:
            [Phenology].Vegetative.Target.FixedValue = 328
            [Phenology].EarlyFlowering.Target.FixedValue = 106
            [Phenology].EarlyGrainFilling.Target.FractionofGrainfilling.FixedValue = 0.14
            [Phenology].LateGrainFilling.Target.EntireGrainfillPeriod.FixedValue = 499
            [Phenology].VegetativePhotoperiodModifier.XYPairs.X = 13.59, 17.6
            [Phenology].ReproductivePhotoperiodModifier.XYPairs.X = 13.59, 17.6
        Cultivar Macon_MG30
          Command:
            [Phenology].Vegetative.Target.FixedValue = 367
            [Phenology].EarlyFlowering.Target.FixedValue = 163
            [Phenology].EarlyGrainFilling.Target.FractionofGrainfilling.FixedValue = 0.175
            [Phenology].LateGrainFilling.Target.EntireGrainfillPeriod.FixedValue = 607
            [Phenology].VegetativePhotoperiodModifier.XYPairs.X = 14.05, 17.56
            [Phenology].ReproductivePhotoperiodModifier.XYPairs.X = 14.05, 17.56
        Cultivar PioneerP93M11_MG31
          Command:
            [Phenology].Vegetative.Target.FixedValue = 250
            [Phenology].EarlyFlowering.Target.FixedValue = 110
            [Phenology].EarlyGrainFilling.Target.FractionofGrainfilling.FixedValue = 0.30
            [Phenology].LateGrainFilling.Target.EntireGrainfillPeriod.FixedValue = 457
            [Phenology].VegetativePhotoperiodModifier.XYPairs.X = 13.4, 16.0
            [Phenology].ReproductivePhotoperiodModifier.XYPairs.X = 13.4, 16.0
            [Grain].MaximumNConc.FixedValue = 0.065
            [Shell].PotentialHarvestIndex.FixedValue = 0.5
            [Leaf].AreaLargestLeaf.FixedValue=0.013
        Cultivar Becks321NRR_MG32
          Command:
            [Phenology].Vegetative.Target.FixedValue = 272
            [Phenology].EarlyFlowering.Target.FixedValue = 117
            [Phenology].EarlyGrainFilling.Target.FractionofGrainfilling.FixedValue = 0.20
            [Phenology].LateGrainFilling.Target.EntireGrainfillPeriod.FixedValue = 522
            [Phenology].VegetativePhotoperiodModifier.XYPairs.X = 13.45, 18.0
            [Phenology].ReproductivePhotoperiodModifier.XYPairs.X = 13.45, 18.0
        Cultivar PioneerP932T16R_MG32
          Command:
            [Phenology].Vegetative.Target.FixedValue = 328
            [Phenology].EarlyFlowering.Target.FixedValue = 106
            [Phenology].EarlyGrainFilling.Target.FractionofGrainfilling.FixedValue = 0.40
            [Phenology].LateGrainFilling.Target.EntireGrainfillPeriod.FixedValue = 499
            [Phenology].VegetativePhotoperiodModifier.XYPairs.X = 13.59, 17.6
            [Phenology].ReproductivePhotoperiodModifier.XYPairs.X = 13.59, 17.6
        Cultivar Becks367NRR_MG37
          Command:
            [Phenology].Vegetative.Target.FixedValue = 267
            [Phenology].EarlyFlowering.Target.FixedValue = 112
            [Phenology].EarlyGrainFilling.Target.FractionofGrainfilling.FixedValue = 0.26
            [Phenology].LateGrainFilling.Target.EntireGrainfillPeriod.FixedValue = 506
            [Phenology].VegetativePhotoperiodModifier.XYPairs.X = 13.27, 17.2
            [Phenology].ReproductivePhotoperiodModifier.XYPairs.X = 13.27, 17.2
        Cultivar AsgrowAG4403_MG40
          Command:
            [Phenology].Vegetative.Target.FixedValue = 292
            [Phenology].EarlyFlowering.Target.FixedValue = 123
            [Phenology].EarlyGrainFilling.Target.FractionofGrainfilling.FixedValue = 0.30
            [Phenology].LateGrainFilling.Target.EntireGrainfillPeriod.FixedValue = 535
            [Phenology].VegetativePhotoperiodModifier.XYPairs.X = 13.09, 16.49
            [Phenology].ReproductivePhotoperiodModifier.XYPairs.X = 13.09, 16.49
        Cultivar HornbeckHBK4891_MG40: same as Replacements.Soybean.USA.AsgrowAG4403_MG40
        Cultivar Pioneer94B01_MG40
          Command:
            [Phenology].Vegetative.Target.FixedValue = 322
            [Phenology].EarlyFlowering.Target.FixedValue = 143
            [Phenology].EarlyGrainFilling.Target.FractionofGrainfilling.FixedValue = 0.30
            [Phenology].LateGrainFilling.Target.EntireGrainfillPeriod.FixedValue = 567
            [Phenology].VegetativePhotoperiodModifier.XYPairs.X = 13.05, 16.46
            [Phenology].ReproductivePhotoperiodModifier.XYPairs.X = 13.05, 16.46
        Cultivar PioneerP9504_MG50
          Command:
            [Phenology].Vegetative.Target.FixedValue = 404
            [Phenology].EarlyFlowering.Target.FixedValue = 112
            [Phenology].EarlyGrainFilling.Target.FractionofGrainfilling.FixedValue = 0.30
            [Phenology].LateGrainFilling.Target.EntireGrainfillPeriod.FixedValue = 505
            [Phenology].VegetativePhotoperiodModifier.XYPairs.X = 12.83, 16.13
            [Phenology].ReproductivePhotoperiodModifier.XYPairs.X = 12.83, 16.13
        Cultivar AsgrowAG5701_MG50
          Command:
            [Phenology].Vegetative.Target.FixedValue = 404
            [Phenology].EarlyFlowering.Target.FixedValue = 131
            [Phenology].EarlyGrainFilling.Target.FractionofGrainfilling.FixedValue = 0.30
            [Phenology].LateGrainFilling.Target.EntireGrainfillPeriod.FixedValue = 549
            [Phenology].VegetativePhotoperiodModifier.XYPairs.X = 12.83, 16.13
            [Phenology].ReproductivePhotoperiodModifier.XYPairs.X = 12.83, 16.13
        Cultivar Hutcheson_MG50
          Command:
            [Phenology].Vegetative.Target.FixedValue = 438
            [Phenology].EarlyFlowering.Target.FixedValue = 112
            [Phenology].EarlyGrainFilling.Target.FractionofGrainfilling.FixedValue = 0.30
            [Phenology].LateGrainFilling.Target.EntireGrainfillPeriod.FixedValue = 505
            [Phenology].VegetativePhotoperiodModifier.XYPairs.X = 12.58, 15.88
            [Phenology].ReproductivePhotoperiodModifier.XYPairs.X = 12.58, 15.88
        Cultivar NK622_MG60
          Command:
            [Phenology].Vegetative.Target.FixedValue = 436
            [Phenology].EarlyFlowering.Target.FixedValue = 93
            [Phenology].EarlyGrainFilling.Target.FractionofGrainfilling.FixedValue = 0.30
            [Phenology].LateGrainFilling.Target.EntireGrainfillPeriod.FixedValue = 467
            [Phenology].VegetativePhotoperiodModifier.XYPairs.X = 12.39, 15.61
            [Phenology].ReproductivePhotoperiodModifier.XYPairs.X = 12.39, 15.61
      CultivarFolder Generic
        Cultivar Generic_MG000
          Command:
            [Phenology].Vegetative.Target.FixedValue = 310
            [Phenology].EarlyFlowering.Target.FixedValue = 100
            [Phenology].EarlyGrainFilling.Target.FractionofGrainfilling.FixedValue = 0.475
            [Phenology].LateGrainFilling.Target.EntireGrainfillPeriod.FixedValue = 590
            [Phenology].VegetativePhotoperiodModifier.XYPairs.X = 14.6, 22.35
            [Phenology].ReproductivePhotoperiodModifier.XYPairs.X = 14.6, 22.35
        Cultivar Generic_MG00
          Command:
            [Phenology].Vegetative.Target.FixedValue = 320
            [Phenology].EarlyFlowering.Target.FixedValue = 100
            [Phenology].EarlyGrainFilling.Target.FractionofGrainfilling.FixedValue = 0.467
            [Phenology].LateGrainFilling.Target.EntireGrainfillPeriod.FixedValue = 600
            [Phenology].VegetativePhotoperiodModifier.XYPairs.X = 14.35, 21.11
            [Phenology].ReproductivePhotoperiodModifier.XYPairs.X = 14.35, 21.11
        Cultivar Generic_MG0
          Command:
            [Phenology].Vegetative.Target.FixedValue = 336
            [Phenology].EarlyFlowering.Target.FixedValue = 120
            [Phenology].EarlyGrainFilling.Target.FractionofGrainfilling.FixedValue = 0.422
            [Phenology].LateGrainFilling.Target.EntireGrainfillPeriod.FixedValue = 616
            [Phenology].VegetativePhotoperiodModifier.XYPairs.X = 14.1, 19.95
            [Phenology].ReproductivePhotoperiodModifier.XYPairs.X = 14.1, 19.95
        Cultivar Generic_MG1
          Command:
            [Phenology].Vegetative.Target.FixedValue = 340
            [Phenology].EarlyFlowering.Target.FixedValue = 120
            [Phenology].EarlyGrainFilling.Target.FractionofGrainfilling.FixedValue = 0.411
            [Phenology].LateGrainFilling.Target.EntireGrainfillPeriod.FixedValue = 632
            [Phenology].VegetativePhotoperiodModifier.XYPairs.X = 13.84, 18.77
            [Phenology].ReproductivePhotoperiodModifier.XYPairs.X = 13.84, 18.77
        Cultivar Generic_MG2
          Command:
            [Phenology].Vegetative.Target.FixedValue = 348
            [Phenology].EarlyFlowering.Target.FixedValue = 120
            [Phenology].EarlyGrainFilling.Target.FractionofGrainfilling.FixedValue = 0.386
            [Phenology].LateGrainFilling.Target.EntireGrainfillPeriod.FixedValue = 648
            [Phenology].VegetativePhotoperiodModifier.XYPairs.X = 13.59, 17.61
            [Phenology].ReproductivePhotoperiodModifier.XYPairs.X = 13.59, 17.61
        Cultivar Generic_MG3
          Command:
            [Phenology].Vegetative.Target.FixedValue = 380
            [Phenology].EarlyFlowering.Target.FixedValue = 120
            [Phenology].EarlyGrainFilling.Target.FractionofGrainfilling.FixedValue = 0.361
            [Phenology].LateGrainFilling.Target.EntireGrainfillPeriod.FixedValue = 664
            [Phenology].VegetativePhotoperiodModifier.XYPairs.X = 13.4, 16.91
            [Phenology].ReproductivePhotoperiodModifier.XYPairs.X = 13.4, 16.91
        Cultivar Generic_MG4
          Command:
            [Phenology].Vegetative.Target.FixedValue = 388
            [Phenology].EarlyFlowering.Target.FixedValue = 140
            [Phenology].EarlyGrainFilling.Target.FractionofGrainfilling.FixedValue = 0.324
            [Phenology].LateGrainFilling.Target.EntireGrainfillPeriod.FixedValue = 664
            [Phenology].VegetativePhotoperiodModifier.XYPairs.X = 13.1, 16.49
            [Phenology].ReproductivePhotoperiodModifier.XYPairs.X = 13.1, 16.49
        Cultivar Generic_MG5
          Command:
            [Phenology].Vegetative.Target.FixedValue = 396
            [Phenology].EarlyFlowering.Target.FixedValue = 160
            [Phenology].EarlyGrainFilling.Target.FractionofGrainfilling.FixedValue = 0.072
            [Phenology].LateGrainFilling.Target.EntireGrainfillPeriod.FixedValue = 696
            [Phenology].VegetativePhotoperiodModifier.XYPairs.X = 12.83, 16.13
            [Phenology].ReproductivePhotoperiodModifier.XYPairs.X = 12.83, 16.13
        Cultivar Generic_MG6
          Command:
            [Phenology].Vegetative.Target.FixedValue = 404
            [Phenology].EarlyFlowering.Target.FixedValue = 180
            [Phenology].EarlyGrainFilling.Target.FractionofGrainfilling.FixedValue = 0.056
            [Phenology].LateGrainFilling.Target.EntireGrainfillPeriod.FixedValue = 712
            [Phenology].VegetativePhotoperiodModifier.XYPairs.X = 12.58, 15.8
            [Phenology].ReproductivePhotoperiodModifier.XYPairs.X = 12.58, 15.8
        Cultivar Generic_MG7
          Command:
            [Phenology].Vegetative.Target.FixedValue = 416
            [Phenology].EarlyFlowering.Target.FixedValue = 200
            [Phenology].EarlyGrainFilling.Target.FractionofGrainfilling.FixedValue = 0.055
            [Phenology].LateGrainFilling.Target.EntireGrainfillPeriod.FixedValue = 728
            [Phenology].VegetativePhotoperiodModifier.XYPairs.X = 12.33, 15.46
            [Phenology].ReproductivePhotoperiodModifier.XYPairs.X = 12.33, 15.46
        Cultivar Generic_MG8
          Command:
            [Phenology].Vegetative.Target.FixedValue = 430
            [Phenology].EarlyFlowering.Target.FixedValue = 200
            [Phenology].EarlyGrainFilling.Target.FractionofGrainfilling.FixedValue = 0.054
            [Phenology].LateGrainFilling.Target.EntireGrainfillPeriod.FixedValue = 744
            [Phenology].VegetativePhotoperiodModifier.XYPairs.X = 12.07, 15.1
            [Phenology].ReproductivePhotoperiodModifier.XYPairs.X = 12.07, 15.1
        Cultivar Generic_MG9
          Command:
            [Phenology].Vegetative.Target.FixedValue = 460
            [Phenology].EarlyFlowering.Target.FixedValue = 200
            [Phenology].EarlyGrainFilling.Target.FractionofGrainfilling.FixedValue = 0.053
            [Phenology].LateGrainFilling.Target.EntireGrainfillPeriod.FixedValue = 748
            [Phenology].VegetativePhotoperiodModifier.XYPairs.X = 11.88, 14.82
            [Phenology].ReproductivePhotoperiodModifier.XYPairs.X = 11.88, 14.82
        Cultivar Generic_MG10
          Command:
            [Phenology].Vegetative.Target.FixedValue = 470
            [Phenology].EarlyFlowering.Target.FixedValue = 200
            [Phenology].EarlyGrainFilling.Target.FractionofGrainfilling.FixedValue = 0.053
            [Phenology].LateGrainFilling.Target.EntireGrainfillPeriod.FixedValue = 748
            [Phenology].VegetativePhotoperiodModifier.XYPairs.X = 11.78, 14.65
            [Phenology].ReproductivePhotoperiodModifier.XYPairs.X = 11.78, 14.65
      Constant MortalityRate: FixedValue=0
      CultivarFolder Mungbean
        Cultivar Berken
        Cultivar King
        Cultivar Emerald
        Cultivar Shangtung
        Cultivar Satin
        Cultivar Celera
        Cultivar Jade
        Cultivar Putland
        Cultivar Opal
        Cultivar Crystal
    Report DailyReport: EventNames=[Clock].DoReport
      VariableNames:
        [Clock].Today
        [Soybean].Root.NSupply
        [Soil].SoilWater.Eo
        [Soil].SoilWater.Es
        [Soil].SoilWater.Drainage
        [Soil].SoilWater.Runoff
        [Soil].SoilWater.pond
        [Soybean].Grain.Live.Wt
        [Soybean].Shell.Live.Wt
        [Soybean].Stem.Live.Wt
        [Soybean].Stem.Live.Wt
        [Soybean].Stem.Live.N
        [Soybean].Grain.Live.N
        [Soybean].Shell.Live.N
        [Soybean].Leaf.Live.Wt
        [Soybean].Root.Live.Wt
        [Soybean].Leaf.Live.N
        [Soybean].Root.Live.N
        [Soybean].Leaf.Live.NConc
        [Soybean].Root.Live.NConc
        [Soybean].Grain.Nconc
        [Soybean].Stem.Nconc
        [Soybean].Pod.NConc
        [Soybean].Shell.Nconc
        [Soybean].AboveGround.N
        [Soybean].Leaf.Transpiration
        [Soybean].Leaf.WaterDemand
        [Soybean].Root.Depth
        [Soybean].Leaf.CoverTotal
        [Soybean].Leaf.CoverDead
        [Soybean].Leaf.LAI
        [Soybean].Leaf.Height
        [Soybean].Leaf.SpecificArea
        [Soil].SoilWater.SWmm
        [Soybean].Arbitrator.N.TotalPlantDemand
        [Soybean].Leaf.Fw
        [Soybean].Leaf.Fn
        [Soybean].Phenology.CurrentPhase.Name
        [Soybean].Phenology.Stage
        [Soybean].Pod.Wt
        [Soybean].Pod.N
        [Soybean].Grain.HarvestIndex
        [Soybean].AboveGround.Wt
        [Soybean].Nodule.NFixed
        [Soil].Nutrient.MineralN[1] as SoilN_0_10cm
        [Soil].Nutrient.MineralN[2] as SoilN_10_30cm
        [Soil].Nutrient.MineralN[3] as SoilN_30_60cm
        [Soil].Nutrient.MineralN[4] as SoilN_60_90cm
        [Soil].Nutrient.MineralN[5] as SoilN_90_120cm
        Sum([Soil].Nutrient.MineralN[1:4]) as SoilN90cm
        Sum([Soil].Nutrient.MineralN[1:5]) as SoilN120cm
        Sum([Soil].SoilWater.PAWmm[1:2]) as Soil.PAW_0_30cm
        [Soil].SoilWater.PAWmm[3] as Soil.PAW_30_60cm
        [Soil].SoilWater.PAWmm[4] as Soil.PAW_60_90cm
        [Soil].SoilWater.PAWmm[5] as Soil.PAW_90_120cm
        Sum([Soil].SoilWater.SWmm[1:5]) as SW120cm
    Report HarvestReport: EventNames=[Soybean].Harvesting
      VariableNames:
        [Clock].Today
        [Soybean].Phenology.Stage
        [Soybean].Phenology.CurrentStageName
        [Soybean].AboveGround.Wt
        [Soybean].AboveGround.N
        [Soybean].Grain.Total.Wt*10 as Yield
        [Soybean].Grain.NConc
        [Soybean].Grain.Size
        [Soybean].Grain.Number
        [Soybean].Grain.Total.Wt
        [Soybean].Grain.Total.N
        [Soybean].Total.Wt
  DataStore
    ExcelInput: FileNames=[MungbeanDataset.xlsx]; SheetNames=[OldValidation, DAF, RCN, CSIRO]
  Folder Mungbean_REMS
    Memo Mungbean_REMS data description
      These trials ([Robinsonetal_2002]) were used to calibrate the original mungbean model.
      In aps18, King and Berkin; planting dates.
      In aps1, berken; sowing densities.
      In aps20, different cultivars were planted.
      In NT1-10, king, berkin, satin,shantung, and putland; different sowing densities/dates.
      In RCM1, berken; irrigation regimes.
      In RCM2, berken; planting densities.
      In RCM, king; different sowing dates.
      In RJL1, berken; irrigation vs. rainfed; following winter cereal or fallow.
      In RJL2, berken; different sowing densities and row spacings.
    Experiment aps18
      Factors
        Permutation
          Factor Sow
            CompositeFactor Nov4_Berken
              Specifications:
                [SowingRule].Script.SowingRate=38.2
                [SowingRule].Script.CultivarName=Berken
                [SowingRule].Script.SowingDate=1993-11-04
            CompositeFactor Nov4_King
              Specifications:
                [SowingRule].Script.SowingRate=26
                [SowingRule].Script.CultivarName=King
                [SowingRule].Script.SowingDate=1993-11-04
            CompositeFactor Nov18_Berken
              Specifications:
                [SowingRule].Script.SowingDate=1993-11-18
                [SowingRule].Script.CultivarName=Berken
                [SowingRule].Script.SowingRate=43.2
            CompositeFactor Nov18_King
              Specifications:
                [SowingRule].Script.SowingDate=1993-11-18
                [SowingRule].Script.SowingRate=12.7
                [SowingRule].Script.CultivarName=King
            CompositeFactor Dec14_Berken
              Specifications:
                [SowingRule].Script.SowingDate=1993-12-14
                [SowingRule].Script.SowingRate=39.6
                [SowingRule].Script.CultivarName=Berken
            CompositeFactor Dec14_King
              Specifications:
                [SowingRule].Script.SowingDate=1993-12-14
                [SowingRule].Script.SowingRate=38.7
                [SowingRule].Script.CultivarName=King
            CompositeFactor Jan4_Berken
              Specifications:
                [SowingRule].Script.SowingDate=1993-01-04
                [SowingRule].Script.SowingRate=39.6
                [SowingRule].Script.CultivarName=Berken
            CompositeFactor Jan4_King
              Specifications:
                [SowingRule].Script.SowingDate=1994-01-04
                [SowingRule].Script.SowingRate=28.6
                [SowingRule].Script.CultivarName=King
            CompositeFactor Jan17_Berken
              Specifications:
                [SowingRule].Script.SowingDate=1994-01-17
                [SowingRule].Script.SowingRate=35.4
                [SowingRule].Script.CultivarName=Berken
            CompositeFactor Jan17_King
              Specifications:
                [SowingRule].Script.SowingDate=1994-01-17
                [SowingRule].Script.SowingRate=27.6
                [SowingRule].Script.CultivarName=King
            CompositeFactor Feb1_Berken
              Specifications:
                [SowingRule].Script.SowingDate=1994-02-01
                [SowingRule].Script.SowingRate=43.8
                [SowingRule].Script.CultivarName=Berken
            CompositeFactor Feb1_King
              Specifications:
                [SowingRule].Script.SowingDate=1994-02-01
                [SowingRule].Script.SowingRate=32.7
                [SowingRule].Script.CultivarName=King
      Simulation aps18
        Clock: Start=1993-10-27; End=1994-05-03
        Summary summaryfile
        Weather: FileName=APS18.MET
        SoilArbitrator Soil Arbitrator
        Zone paddock: Area=1; Slope=0; AspectAngle=0; Altitude=50
          MicroClimate: a_interception=0; b_interception=1; c_interception=0; d_interception=0; soil_albedo=0.3; SoilHeatFluxFraction=0; MinimumHeightDiffForNewLayer=0; NightInterceptionFraction=0; ReferenceHeight=0
          Irrigation
          Fertiliser
          SurfaceOrganicMatter: InitialResidueName=wheat; InitialResidueType=wheat; InitialResidueMass=500; InitialStandingFraction=0; InitialCPR=0; InitialCNR=40
          Report DailyReport: EventNames=[Clock].DoReport
            VariableNames:
              [Clock].Today
              [DiagnosticsVariables].Script.AccumPlantN
              [DiagnosticsVariables].Script.AccumMineralisation
              [DiagnosticsVariables].Script.AccumDenit
              [DiagnosticsVariables].Script.AccumFert
              [DiagnosticsVariables].Script.AccumLeach
              [DiagnosticsVariables].Script.AccumDetach
              [DiagnosticsVariables].Script.DeltaSoilOMN
              [DiagnosticsVariables].Script.DeltaSurfaceOMN
              [DiagnosticsVariables].Script.DeltaSoilMineralN
              [Soybean].Root.NSupply
              [Soil].SoilWater.Eo
              [Soil].SoilWater.Es
              [DiagnosticsVariables].Script.SWC
              [DiagnosticsVariables].Script.DUL
              [Soil].SoilWater.Drainage
              [Soil].SoilWater.Runoff
              [DiagnosticsVariables].Script.OutFlowLat
              [Soil].SoilWater.pond
              [DiagnosticsVariables].Script.AccumEO
              [DiagnosticsVariables].Script.AccumEP
              [DiagnosticsVariables].Script.AccumES
              [DiagnosticsVariables].Script.AccumDrainage
              [DiagnosticsVariables].Script.AccumRunoff
              [DiagnosticsVariables].Script.AccumRainfall
              [DiagnosticsVariables].Script.AccumIrrigation
              [DiagnosticsVariables].Script.AccumOutflowLat
              [DiagnosticsVariables].Script.SoilWaterDeficit
              [Soybean].Grain.Live.Wt
              [Soybean].Shell.Live.Wt
              [Soybean].Stem.Live.Wt
              [Soybean].Stem.Live.Wt
              [Soybean].Grain.Live.N
              [Soybean].Shell.Live.N
              [Soybean].Leaf.Live.Wt
              [Soybean].Root.Live.Wt
              [Soybean].Leaf.Live.N
              [Soybean].Root.Live.N
              [Soybean].Leaf.Live.NConc
              [Soybean].Root.Live.NConc
              [Soybean].Root.WaterSupply
              [Soybean].Root.WaterUptake
              [Soybean].Leaf.Transpiration
              [Soybean].Leaf.WaterDemand
              [Soybean].Root.Depth
              [Soybean].Leaf.CoverTotal
              [Soybean].Leaf.CoverDead
              [Soybean].Leaf.LAI
              [Soybean].Leaf.Height
              [Soybean].Leaf.PotentialBiomass
              [Soil].SoilWater.SWmm
              [Soil].Nutrient.NO3.kgha
              [DiagnosticsVariables].Script.SoilNitrogenContent
              [Soybean].Arbitrator.N.TotalPlantDemand
              [MicroClimate].net_radn
              [MicroClimate].peta
              [MicroClimate].petr
              [DiagnosticsVariables].Script.FomN
              [DiagnosticsVariables].Script.HumN
              [DiagnosticsVariables].Script.BiomN
              [DiagnosticsVariables].Script.DltNMinRes
              [DiagnosticsVariables].Script.DltNMinTot
              [Soybean].Leaf.Fw
              [Soybean].Leaf.Fn
              [Soybean].Phenology.CurrentPhase.Name
              [Soybean].Phenology.Stage
              [Soybean].Pod.Wt
              [Soybean].Pod.N
              [Soybean].Structure.LeafTipsAppeared
              [Soybean].Structure.MainStemPrimordiaNo
              [Soybean].Leaf.CohortArea[1]
              [Soybean].Leaf.CohortArea[2]
              [Soybean].Leaf.CohortArea[3]
              [Soybean].Leaf.CohortArea[4]
              [Soybean].Leaf.CohortArea[5]
              [Soybean].Leaf.CohortArea[6]
              [Soybean].Leaf.CohortArea[7]
              [Soybean].Leaf.CohortArea[8]
              [Soybean].Leaf.CohortArea[9]
              [Soybean].Leaf.CohortArea[10]
              [Soybean].Leaf.CohortArea[11]
              [Soybean].Leaf.CohortArea[12]
              [Soybean].Leaf.CohortArea[13]
              [Soybean].Leaf.CohortArea[14]
              [Soybean].Leaf.CohortArea[15]
              [Soybean].Leaf.AppearedCohortNo
              [Soybean].Leaf.DeadCohortNo
              [Soybean].AboveGround.Wt
              [Soybean].Phenology.Stage
              [Soybean].Structure.MainStemPrimordiaNo
              [Soybean].Phenology.NFF
              [SoybeanHarvestRule].Script.FinalTag
              [Soybean].Grain.NumberFunction
              [Soybean].Shell.PodNumber
              [Soybean].Phenology.FN
              [Soybean].Phenology.FN.TotalNodes
              [Soybean].Phenology.FN.VegetativeNodes
          Manager SowingRule
            RowSpacing = 500
            SowingDepth = 50
            SowingRate = 38.2
            CultivarName = Berkin
            SowingDate = 11/04/1993 00:00:00
```csharp
using APSIM.Shared.Utilities;
using Models.PMF;
using Models.Core;
using System;
        
        namespace Models
        {
           [Serializable] 
           [System.Xml.Serialization.XmlInclude(typeof(Model))]
            public class Script : Model
            {      
               [Link] Plant Soybean;
               [Link] Clock Clock;

               [Description("Spacing (mm) between rows")]
               public double RowSpacing { get; set; }
               [Description("Depth (mm) Grains are planted")]
               public double SowingDepth { get; set; }
               [Description("Seeds sown (/m2)")]
               public double SowingRate { get; set; }
               [Description("Cultivar")]
               [Display(Type=DisplayType.CultivarName)]
               public string CultivarName { get; set; }
               [Description("Sowing Date")]
               public DateTime SowingDate { get; set; }

               [EventSubscribe("DoManagement")]
               private void OnDoManagement(object sender, EventArgs e)
               {
                if (Clock.Today.Date == SowingDate)
                    Soybean.Sow(population:SowingRate, cultivar:CultivarName, depth:SowingDepth, rowSpacing:RowSpacing, budNumber:1);
               }
            }
        }
```
          Manager HarvestRule
```csharp
using Models.PMF.Phen;
using APSIM.Shared.Utilities;
using System.Xml.Serialization;
using Models;
using Models.PMF;
using Models.Soils;
using System.Text;
using System.Collections.Generic;
using Models.Core;
using System;
using Models.Soils.Nutrients;

namespace Models
{
    [Serializable] 
    public class Script : Model
    {      
        [Link] private Plant Soybean;
        [Link] private Zone zone;
        [Link(Type = LinkType.Path, Path = "[Soybean].Phenology")]
        private Phenology phenology;
                    
        
        [EventSubscribe("StartOfSimulation")]
        private void OnSimulationCommencing(object sender, EventArgs e)
        {
        }       
        
        [EventSubscribe("DoManagement")]
        private void OnDoManagement(object sender, EventArgs e)
        {
        if (phenology.CurrentPhase.Name=="ReadyForHarvesting")
           {
           Soybean.Harvest();
           Soybean.EndCrop();
           }
        }
        
        [EventSubscribe("DoManagementCalculations")]
        private void OnDoManagementCalculations(object sender, EventArgs e)
        {
            
        }
    }
}
```
          Report HarvestReport: same as Replacements.HarvestReport
          Plant Soybean
          Manager Irrigate on fixed dates
            IrrigateDates = 27-oct
            Amount = 42
            Depth = 0
            Efficiency = 1
            WillRunoff = False
```csharp
using APSIM.Shared.Utilities;
using Models.PMF;
using Models.Core;
using System;
namespace Models
{
    [Serializable]
    public class Script : Model
    {
        [Link] Clock Clock;
        [Link] Irrigation Irrigation;
        
        [Separator("A component to apply irrigation on one or more dates on every year of the simulation")]

        [Description("Enter the irrigation dates as dd-mmm with comma separation (any year information entered will be ignored)")] 
        public string[] IrrigateDates { get; set; }
        
        [Description("Amount of irrigation to be applied (mm)")] 
        public double Amount { get; set; }
        
        [Description("Depth in the soil to apply the  irrigation (mm)")] 
        public double Depth { get; set; }
        
        [Description("Efficiency of irrigation (0-1)")] 
        public double Efficiency { get; set; }
        
        [Description("Will the irrigation runoff?")] 
        public bool WillRunoff { get; set; }
        
        [EventSubscribe("DoManagement")]
        private void OnDoManagement(object sender, EventArgs e)
        {
            foreach (string ddMMM in IrrigateDates)
            {
                if (DateUtilities.DatesEqual(ddMMM, Clock.Today))
                    Irrigation.Apply(amount: Amount, depth: Depth, efficiency: Efficiency, willRunoff: WillRunoff);
            }
        }
    }
}
```
          Manager Irrigate on fixed dates1
            IrrigateDates = 10-nov
            Amount = 15
            Depth = 0
            Efficiency = 1
            WillRunoff = False
            script: same as in Mungbean_REMS.aps18.aps18.paddock.Irrigate on fixed dates
          Manager Irrigate on fixed dates2
            IrrigateDates = 22-nov
            Amount = 28
            Depth = 0
            Efficiency = 1
            WillRunoff = False
            script: same as in Mungbean_REMS.aps18.aps18.paddock.Irrigate on fixed dates
          Manager Irrigate on fixed dates3
            IrrigateDates = 01-dec, 15-dec, 29-dec
            Amount = 14
            Depth = 0
            Efficiency = 1
            WillRunoff = False
            script: same as in Mungbean_REMS.aps18.aps18.paddock.Irrigate on fixed dates
          Manager Irrigate on fixed dates4
            IrrigateDates = 29-dec
            Amount = 21
            Depth = 0
            Efficiency = 1
            WillRunoff = False
            script: same as in Mungbean_REMS.aps18.aps18.paddock.Irrigate on fixed dates
          Manager Irrigate on fixed dates5
            IrrigateDates = 04-jan
            Amount = 18
            Depth = 0
            Efficiency = 1
            WillRunoff = False
            script: same as in Mungbean_REMS.aps18.aps18.paddock.Irrigate on fixed dates
          Soil: Latitude=0; Longitude=0
            WaterBalance SoilWater: SummerDate=1-Nov; SummerU=1.5; SummerCona=6.6; WinterDate=1-Apr; WinterU=1.5; WinterCona=6.6; DiffusConst=88; DiffusSlope=35.4; Salb=0.2; CN2Bare=70; CNRed=20; CNCov=0.8; DischargeWidth=5; CatchmentArea=10; Thickness=[150, 150, 150, 150, 150, 150, 300, 300, 300]; SWCON=[0.7, 0.7, 0.7, 0.7, 0.7, 0.7, 0.7, 0.7, 0.7]
            CERESSoilTemperature Temperature
            Organic: FOMCNRatio=33
              Thickness  Carbon  SoilCNRatio  FBiom  FInert  FOM
              150        1.27    14.5         0.05   0.39    0
              150        0.59    14.5         0.02   0.47    0
              150        0.34    14.5         0.015  0.52    0
              150        0.34    14.5         0.01   0.62    0
              150        0.26    14.5         0.01   0.74    0
              150        0.26    14.5         0.01   0.83    0
              300        0.25    14.5         0.01   0.93    0
              300        0.19    14.5         0.01   0.93    0
              300        0.21    14.5         0.01   0.93    0
            Chemical
              Thickness  NO3N  NH4N  PH
              150        2     1     6.5
              150        2     1     6.2
              150        2     1     6.3
              150        2     1     6.4
              150        2     1     6.5
              150        2     1     6.6
              300        2     1     6.6
              300        2     1     6.5
              300        1     0.2   6.5
            Sample Initial conditions: Thickness=[150, 150, 150, 150, 300, 300, 300, 300]; SW=[0.255, 0.322, 0.321, 0.321, 0.243, 0.211, 0.17, 0.17]; SWUnits=Volumetric; OCUnits=Total; PHUnits=Water
            Physical
              Thickness  BD    AirDry  LL15  DUL    SAT
              150        1.38  0.05    0.18  0.38   0.43
              150        1.34  0.19    0.19  0.38   0.43
              150        1.31  0.22    0.22  0.395  0.45
              150        1.4   0.19    0.19  0.41   0.45
              300        1.45  0.22    0.22  0.4    0.45
              300        1.46  0.19    0.19  0.39   0.44
              300        1.46  0.17    0.17  0.38   0.4
              300        1.46  0.17    0.17  0.38   0.4
              SoilCrop SoybeanSoil: LL=[0.2, 0.201, 0.237, 0.192, 0.22, 0.191, 0.249, 0.249]; KL=[0.08, 0.08, 0.08, 0.08, 0.06, 0.04, 0.02, 0.01]; XF=[1, 1, 1, 1, 1, 1, 1, 1]
            Nutrient
    Experiment aps1
      Factors
        Permutation
          Factor Sow
            CompositeFactor High
              Specifications:
                [SowingRule].Script.SowingRate=36.2
                [SowingRule].Script.CultivarName=Berken
                [SowingRule].Script.SowingDate=1991-02-01
            CompositeFactor Low
              Specifications:
                [SowingRule].Script.SowingRate=10.7
                [SowingRule].Script.CultivarName=Berken
                [SowingRule].Script.SowingDate=1991-02-01
      Simulation aps1
        Clock: Start=1991-01-25; End=1991-06-20
        Summary summaryfile
        Weather: FileName=GAT9091.MET
        SoilArbitrator Soil Arbitrator
        Zone paddock: Area=1; Slope=0; AspectAngle=0; Altitude=50
          MicroClimate: a_interception=0; b_interception=1; c_interception=0; d_interception=0; soil_albedo=0.3; SoilHeatFluxFraction=0; MinimumHeightDiffForNewLayer=0; NightInterceptionFraction=0; ReferenceHeight=0
          Irrigation
          Fertiliser
          SurfaceOrganicMatter: InitialResidueName=wheat; InitialResidueType=wheat; InitialResidueMass=500; InitialStandingFraction=0; InitialCPR=0; InitialCNR=40
          Report DailyReport: same as Mungbean_REMS.aps18.aps18.paddock.DailyReport
          Manager SowingRule: same as Mungbean_REMS.aps18.aps18.paddock.SowingRule
          Manager HarvestRule: same as Mungbean_REMS.aps18.aps18.paddock.HarvestRule
          Report HarvestReport: same as Replacements.HarvestReport
          Plant Soybean
          Manager Irrigate on fixed dates
            IrrigateDates = 01-feb, 07-apr
            Amount = 6
            Depth = 0
            Efficiency = 1
            WillRunoff = False
            script: same as in Mungbean_REMS.aps18.aps18.paddock.Irrigate on fixed dates
          Manager Irrigate on fixed dates1
            IrrigateDates = 05-feb, 19-apr
            Amount = 10
            Depth = 0
            Efficiency = 1
            WillRunoff = False
            script: same as in Mungbean_REMS.aps18.aps18.paddock.Irrigate on fixed dates
          Manager Irrigate on fixed dates2
            IrrigateDates = 21-feb, 26-feb, 08-mar, 15-may
            Amount = 15
            Depth = 0
            Efficiency = 1
            WillRunoff = False
            script: same as in Mungbean_REMS.aps18.aps18.paddock.Irrigate on fixed dates
          Manager Irrigate on fixed dates3
            IrrigateDates = 01-mar
            Amount = 20
            Depth = 0
            Efficiency = 1
            WillRunoff = False
            script: same as in Mungbean_REMS.aps18.aps18.paddock.Irrigate on fixed dates
          Manager Irrigate on fixed dates4
            IrrigateDates = 12-mar
            Amount = 37
            Depth = 0
            Efficiency = 1
            WillRunoff = False
            script: same as in Mungbean_REMS.aps18.aps18.paddock.Irrigate on fixed dates
          Manager Irrigate on fixed dates5
            IrrigateDates = 15-mar
            Amount = 18
            Depth = 0
            Efficiency = 1
            WillRunoff = False
            script: same as in Mungbean_REMS.aps18.aps18.paddock.Irrigate on fixed dates
          Manager Irrigate on fixed dates6
            IrrigateDates = 19-mar
            Amount = 17
            Depth = 0
            Efficiency = 1
            WillRunoff = False
            script: same as in Mungbean_REMS.aps18.aps18.paddock.Irrigate on fixed dates
          Manager Irrigate on fixed dates7
            IrrigateDates = 21-mar, 12-apr
            Amount = 16
            Depth = 0
            Efficiency = 1
            WillRunoff = False
            script: same as in Mungbean_REMS.aps18.aps18.paddock.Irrigate on fixed dates
          Manager Irrigate on fixed dates8
            IrrigateDates = 27-mar, 05-may
            Amount = 35
            Depth = 0
            Efficiency = 1
            WillRunoff = False
            script: same as in Mungbean_REMS.aps18.aps18.paddock.Irrigate on fixed dates
          Manager Irrigate on fixed dates9
            IrrigateDates = 03-apr
            Amount = 12
            Depth = 0
            Efficiency = 1
            WillRunoff = False
            script: same as in Mungbean_REMS.aps18.aps18.paddock.Irrigate on fixed dates
          Manager Irrigate on fixed dates10
            IrrigateDates = 12-apr
            Amount = 16
            Depth = 0
            Efficiency = 1
            WillRunoff = False
            script: same as in Mungbean_REMS.aps18.aps18.paddock.Irrigate on fixed dates
          Manager Irrigate on fixed dates11
            IrrigateDates = 15-apr
            Amount = 8
            Depth = 0
            Efficiency = 1
            WillRunoff = False
            script: same as in Mungbean_REMS.aps18.aps18.paddock.Irrigate on fixed dates
          Manager Irrigate on fixed dates12
            IrrigateDates = 22-apr
            Amount = 5
            Depth = 0
            Efficiency = 1
            WillRunoff = False
            script: same as in Mungbean_REMS.aps18.aps18.paddock.Irrigate on fixed dates
          Soil APS1_soil: Latitude=0; Longitude=0
            WaterBalance SoilWater: SummerDate=1-Nov; SummerU=6; SummerCona=3.5; WinterDate=1-Apr; WinterU=6; WinterCona=3.5; DiffusConst=88; DiffusSlope=35.4; Salb=0.13; CN2Bare=72; CNRed=20; CNCov=0.8; DischargeWidth=5; CatchmentArea=10; Thickness=[150, 150, 150, 150, 300, 300, 300, 300]; SWCON=[0.4, 0.4, 0.4, 0.4, 0.4, 0.4, 0.4, 0.4]
            CERESSoilTemperature Temperature
            Organic: FOMCNRatio=33
              Thickness  Carbon  SoilCNRatio  FBiom  FInert  FOM
              150        2.2     14.5         0.02   0.36    0
              150        1.6     14.5         0.015  0.5     0
              150        1.35    14.5         0.01   0.59    0
              150        0.95    14.5         0.01   0.84    0
              300        1       14.5         0.01   0.8     0
              300        0.8     14.5         0.01   0.99    0
              300        0.45    14.5         0.01   0.99    0
              300        0.45    14.5         0.01   0.99    0
            Chemical
              Thickness  NO3N  NH4N  PH
              150        2     1     7.5
              150        2     1     8
              150        2     1     8
              150        2     1     8
              300        2     1     8
              300        2     1     8
              300        2     1     8
              300        2     1     8
            Sample Initial conditions: Thickness=[150, 150, 150, 150, 300, 300, 300, 300]; SW=[0.38, 0.38, 0.395, 0.41, 0.4, 0.39, 0.38, 0.38]; SWUnits=Volumetric; OCUnits=Total; PHUnits=Water
            Nutrient
            Physical: same as Mungbean_REMS.aps18.aps18.paddock.soil.Physical
          Operations
    Experiment aps20
      Factors
        Permutation
          Factor Sow
            CompositeFactor Emerald_high_Dec17
              Specifications:
                [SowingRule].Script.SowingRate=30.8
                [SowingRule].Script.CultivarName=Emerald
                [SowingRule].Script.SowingDate=1993-12-17
                [SowingRule].Script.RowSpacing=230
            CompositeFactor Emerald_low_Dec28
              Specifications:
                [SowingRule].Script.SowingRate=19.6
                [SowingRule].Script.CultivarName=Emerald
                [SowingRule].Script.SowingDate=1993-12-28
                [SowingRule].Script.RowSpacing=180
            CompositeFactor Emerald_low_Dec18
              Specifications:
                [SowingRule].Script.SowingRate=19.3
                [SowingRule].Script.CultivarName=Emerald
                [SowingRule].Script.SowingDate=1993-12-18
                [SowingRule].Script.RowSpacing=460
            CompositeFactor Shangtung_low_Dec27
              Specifications:
                [SowingRule].Script.SowingRate=16.3
                [SowingRule].Script.CultivarName=Shangtung
                [SowingRule].Script.SowingDate=1993-12-27
                [SowingRule].Script.RowSpacing=450
            CompositeFactor Shangtung_high_Dec18
              Specifications:
                [SowingRule].Script.SowingRate=23.5
                [SowingRule].Script.CultivarName=Shangtung
                [SowingRule].Script.SowingDate=1993-12-18
                [SowingRule].Script.RowSpacing=200
            CompositeFactor Celera_high_Dec17
              Specifications:
                [SowingRule].Script.SowingRate=29
                [SowingRule].Script.CultivarName=Celera
                [SowingRule].Script.SowingDate=1993-12-17
                [SowingRule].Script.RowSpacing=350
            CompositeFactor Satin_low_Dec20
              Specifications:
                [SowingRule].Script.SowingRate=18.5
                [SowingRule].Script.CultivarName=Satin
                [SowingRule].Script.SowingDate=1993-12-20
                [SowingRule].Script.RowSpacing=760
            CompositeFactor Berken_high_Dec21
              Specifications:
                [SowingRule].Script.SowingRate=32
                [SowingRule].Script.CultivarName=Berken
                [SowingRule].Script.SowingDate=1993-12-21
                [SowingRule].Script.RowSpacing=450
            CompositeFactor Satin_high_Dec18
              Specifications:
                [SowingRule].Script.SowingRate=22.4
                [SowingRule].Script.CultivarName=Satin
                [SowingRule].Script.SowingDate=1993-12-18
                [SowingRule].Script.RowSpacing=970
      Simulation aps20
        Clock: Start=1993-12-16; End=1994-05-21
        Summary summaryfile
        Weather: FileName=MANS9394.MET
        SoilArbitrator Soil Arbitrator
        Zone paddock: Area=1; Slope=0; AspectAngle=0; Altitude=50
          MicroClimate: a_interception=0; b_interception=1; c_interception=0; d_interception=0; soil_albedo=0.3; SoilHeatFluxFraction=0; MinimumHeightDiffForNewLayer=0; NightInterceptionFraction=0; ReferenceHeight=0
          Irrigation
          Fertiliser
          SurfaceOrganicMatter: InitialResidueName=wheat; InitialResidueType=wheat; InitialResidueMass=500; InitialStandingFraction=0; InitialCPR=0; InitialCNR=40
          Report DailyReport: same as Mungbean_REMS.aps18.aps18.paddock.DailyReport
          Manager SowingRule
            SowingDate = 11/04/1993 00:00:00
            SowingRate = 38.2
            CultivarName = Berkin
            RowSpacing = 230
            SowingDepth = 40
            script: same as in Mungbean_REMS.aps18.aps18.paddock.SowingRule
          Manager HarvestRule: same as Mungbean_REMS.aps18.aps18.paddock.HarvestRule
          Report HarvestReport: same as Replacements.HarvestReport
          Plant Soybean
          Soil APS20_soil: Latitude=0; Longitude=0
            WaterBalance SoilWater: SummerDate=1-Nov; SummerU=6; SummerCona=3.5; WinterDate=1-Apr; WinterU=6; WinterCona=3.5; DiffusConst=40; DiffusSlope=16; Salb=0.13; CN2Bare=75; CNRed=20; CNCov=0.8; DischargeWidth=5; CatchmentArea=10; Thickness=[150, 150, 300, 300, 300, 300, 300]; SWCON=[0.1, 0.1, 0.1, 0.1, 0.1, 0.1, 0.1]
            CERESSoilTemperature Temperature
            Organic: FOMCNRatio=33
              Thickness  Carbon  SoilCNRatio  FBiom  FInert  FOM
              150        0.8     14.5         0.05   0.39    0
              150        0.6     14.5         0.02   0.47    0
              300        0.5     14.5         0.015  0.52    0
              300        0.3     14.5         0.01   0.62    0
              300        0.2     14.5         0.01   0.74    0
              300        0.2     14.5         0.01   0.83    0
              300        0.1     14.5         0.01   0.93    0
            Chemical
              Thickness  NO3N  NH4N  PH
              150        2     1     8.9
              150        2     1     8.9
              300        2     1     9
              300        2     1     9
              300        2     1     9
              300        2     1     9
              300        2     1     9
            Sample Initial conditions: Thickness=[150, 150, 300, 300, 300, 300, 300]; SW=[0.4, 0.4, 0.4, 0.4, 0.265, 0.368, 0.368]; SWUnits=Volumetric; OCUnits=Total; PHUnits=Water
            Nutrient
            Physical
              Thickness  BD    AirDry  LL15   DUL    SAT
              150        1.39  0.1     0.182  0.428  0.47
              150        1.41  0.24    0.24   0.427  0.467
              300        1.42  0.3     0.3    0.424  0.46
              300        1.46  0.297   0.297  0.439  0.449
              300        1.45  0.265   0.265  0.437  0.452
              300        1.5   0.368   0.368  0.428  0.433
              300        1.49  0.368   0.368  0.402  0.43
              SoilCrop SoybeanSoil: LL=[0.272, 0.311, 0.315, 0.297, 0.345, 0.41, 0.39]; KL=[0.12, 0.12, 0.12, 0.09, 0.06, 0.05, 0.01]; XF=[1, 1, 1, 1, 1, 1, 1]
    Experiment NT10
      Factors
        Permutation
          Factor Sow
            CompositeFactor King_low_Jan1
              Specifications:
                [SowingRule].Script.SowingRate=10
                [SowingRule].Script.CultivarName=King
                [SowingRule].Script.SowingDate=1988-01-01
            CompositeFactor King_medium_Jan1
              Specifications:
                [SowingRule].Script.SowingRate=20
                [SowingRule].Script.CultivarName=King
                [SowingRule].Script.SowingDate=1988-01-01
            CompositeFactor King_high_Jan1
              Specifications:
                [SowingRule].Script.SowingRate=40
                [SowingRule].Script.CultivarName=King
                [SowingRule].Script.SowingDate=1988-01-01
            CompositeFactor King_low_Jan17
              Specifications:
                [SowingRule].Script.SowingRate=10
                [SowingRule].Script.CultivarName=King
                [SowingRule].Script.SowingDate=1988-01-17
            CompositeFactor King_medium_Jan17
              Specifications:
                [SowingRule].Script.SowingRate=20
                [SowingRule].Script.CultivarName=King
                [SowingRule].Script.SowingDate=1988-01-17
            CompositeFactor King_high_Jan17
              Specifications:
                [SowingRule].Script.SowingRate=40
                [SowingRule].Script.CultivarName=King
                [SowingRule].Script.SowingDate=1988-01-17
            CompositeFactor Putland_low_Jan17
              Specifications:
                [SowingRule].Script.SowingRate=10
                [SowingRule].Script.CultivarName=Putland
                [SowingRule].Script.SowingDate=1988-01-17
            CompositeFactor Putland_medium_Jan17
              Specifications:
                [SowingRule].Script.SowingRate=20
                [SowingRule].Script.CultivarName=Putland
                [SowingRule].Script.SowingDate=1988-01-17
            CompositeFactor Putland_high_Jan17
              Specifications:
                [SowingRule].Script.SowingRate=40
                [SowingRule].Script.CultivarName=Putland
                [SowingRule].Script.SowingDate=1988-01-17
      Simulation NT10
        Clock: Start=1987-09-07; End=1988-05-29
        Summary summaryfile
        Weather: FileName=KRS8788.MET
        SoilArbitrator Soil Arbitrator
        Zone paddock: Area=1; Slope=0; AspectAngle=0; Altitude=50
          MicroClimate: a_interception=0; b_interception=1; c_interception=0; d_interception=0; soil_albedo=0.3; SoilHeatFluxFraction=0; MinimumHeightDiffForNewLayer=0; NightInterceptionFraction=0; ReferenceHeight=0
          Irrigation
          Fertiliser
          SurfaceOrganicMatter: InitialResidueName=wheat; InitialResidueType=wheat; InitialResidueMass=500; InitialStandingFraction=0; InitialCPR=0; InitialCNR=40
          Report DailyReport: same as Mungbean_REMS.aps18.aps18.paddock.DailyReport
          Manager SowingRule
            SowingDate = 11/04/1993 00:00:00
            SowingRate = 38.2
            CultivarName = Berkin
            RowSpacing = 230
            SowingDepth = 30
            script: same as in Mungbean_REMS.aps18.aps18.paddock.SowingRule
          Manager HarvestRule: same as Mungbean_REMS.aps18.aps18.paddock.HarvestRule
          Report HarvestReport: same as Replacements.HarvestReport
          Plant Soybean
          Soil NT10_soil: Latitude=0; Longitude=0
            WaterBalance SoilWater: same as Mungbean_REMS.aps18.aps18.paddock.soil.SoilWater
            CERESSoilTemperature Temperature
            Organic: same as Mungbean_REMS.aps18.aps18.paddock.soil.Organic
            Chemical: same as Mungbean_REMS.aps18.aps18.paddock.soil.Chemical
            Sample Initial conditions: Thickness=[150, 150, 150, 150, 150, 150, 300, 300, 300]; SWUnits=Volumetric; OCUnits=Total; PHUnits=Water
              SW=[0.19, 0.21, 0.21, 0.223, 0.219, 0.219, 0.219, 0.229, 0.237]
            Nutrient
            Physical
              Thickness  BD    AirDry  LL15   DUL    SAT
              150        1.56  0.053   0.19   0.304  0.315
              150        1.52  0.08    0.21   0.31   0.33
              150        1.46  0.21    0.21   0.31   0.337
              150        1.46  0.223   0.223  0.324  0.34
              150        1.42  0.219   0.219  0.328  0.34
              150        1.42  0.219   0.219  0.328  0.341
              300        1.46  0.219   0.219  0.325  0.344
              300        1.5   0.229   0.229  0.337  0.346
              300        1.53  0.237   0.237  0.35   0.37
              SoilCrop SoybeanSoil
                LL=[0.19, 0.21, 0.21, 0.235, 0.233, 0.242, 0.248, 0.277, 0.285]
                KL=[0.16, 0.16, 0.12, 0.1, 0.1, 0.08, 0.06, 0.04, 0.03]
                XF=[1, 1, 1, 1, 1, 1, 1, 0, 0]
    Experiment NT1
      Factors
        Permutation
          Factor Cultivar_SowDate
            CompositeFactor Berken_early
              Specifications:
                [SowingRule].Script.SowingRate=38
                [SowingRule].Script.CultivarName=Berken
                [SowingRule].Script.SowingDate=1987-01-05
            CompositeFactor Berken_late
              Specifications:
                [SowingRule].Script.SowingRate=36
                [SowingRule].Script.CultivarName=Berken
                [SowingRule].Script.SowingDate=1987-01-30
            CompositeFactor King_early
              Specifications:
                [SowingRule].Script.SowingRate=33.5
                [SowingRule].Script.CultivarName=King
                [SowingRule].Script.SowingDate=1987-01-05
            CompositeFactor King_late
              Specifications:
                [SowingRule].Script.SowingRate=36
                [SowingRule].Script.CultivarName=King
                [SowingRule].Script.SowingDate=1987-01-30
            CompositeFactor Satin_early
              Specifications:
                [SowingRule].Script.SowingRate=35.2
                [SowingRule].Script.CultivarName=Satin
                [SowingRule].Script.SowingDate=1987-01-05
            CompositeFactor Satin_late
              Specifications:
                [SowingRule].Script.SowingRate=40.8
                [SowingRule].Script.CultivarName=Satin
                [SowingRule].Script.SowingDate=1987-01-30
            CompositeFactor Shangtung_early
              Specifications:
                [SowingRule].Script.SowingRate=35.2
                [SowingRule].Script.CultivarName=Shangtung
                [SowingRule].Script.SowingDate=1987-01-05
            CompositeFactor Shangtung_late
              Specifications:
                [SowingRule].Script.SowingRate=34.4
                [SowingRule].Script.CultivarName=Shangtung
                [SowingRule].Script.SowingDate=1987-01-30
            CompositeFactor Putland_early
              Specifications:
                [SowingRule].Script.SowingRate=33.5
                [SowingRule].Script.CultivarName=Putland
                [SowingRule].Script.SowingDate=1987-01-05
            CompositeFactor Putland_late
              Specifications:
                [SowingRule].Script.SowingRate=33.2
                [SowingRule].Script.CultivarName=Putland
                [SowingRule].Script.SowingDate=1987-01-30
      Simulation NT1
        Clock: Start=1986-09-07; End=1987-05-30
        Summary summaryfile
        Weather: FileName=KRC8687.MET
        SoilArbitrator Soil Arbitrator
        Zone paddock: Area=1; Slope=0; AspectAngle=0; Altitude=50
          MicroClimate: a_interception=0; b_interception=1; c_interception=0; d_interception=0; soil_albedo=0.3; SoilHeatFluxFraction=0; MinimumHeightDiffForNewLayer=0; NightInterceptionFraction=0; ReferenceHeight=0
          Irrigation
          Fertiliser
          SurfaceOrganicMatter: InitialResidueName=wheat; InitialResidueType=wheat; InitialResidueMass=500; InitialStandingFraction=0; InitialCPR=0; InitialCNR=40
          Report DailyReport: same as Mungbean_REMS.aps18.aps18.paddock.DailyReport
          Manager SowingRule: same as Mungbean_REMS.NT10.NT10.paddock.SowingRule
          Manager HarvestRule: same as Mungbean_REMS.aps18.aps18.paddock.HarvestRule
          Report HarvestReport: same as Replacements.HarvestReport
          Plant Soybean
          Soil NT1_soil: same as Mungbean_REMS.NT10.NT10.paddock.NT10_soil
    Experiment NT2
      Factors
        Permutation
          Factor Cultivar_SowDate
            CompositeFactor King_Jan15
              Specifications:
                [SowingRule].Script.SowingRate=38.9
                [SowingRule].Script.CultivarName=King
                [SowingRule].Script.SowingDate=1987-01-15
            CompositeFactor King_Jan28
              Specifications:
                [SowingRule].Script.SowingRate=33.4
                [SowingRule].Script.CultivarName=King
                [SowingRule].Script.SowingDate=1987-01-28
            CompositeFactor King_Feb10
              Specifications:
                [SowingRule].Script.SowingRate=31.7
                [SowingRule].Script.CultivarName=King
                [SowingRule].Script.SowingDate=1987-02-10
            CompositeFactor King_Feb25
              Specifications:
                [SowingRule].Script.SowingRate=32.9
                [SowingRule].Script.CultivarName=King
                [SowingRule].Script.SowingDate=1987-02-25
            CompositeFactor Satin_Jan15
              Specifications:
                [SowingRule].Script.SowingRate=26.1
                [SowingRule].Script.CultivarName=Satin
                [SowingRule].Script.SowingDate=1987-01-15
            CompositeFactor Satin_Jan28
              Specifications:
                [SowingRule].Script.SowingRate=36
                [SowingRule].Script.CultivarName=Satin
                [SowingRule].Script.SowingDate=1987-01-28
            CompositeFactor Satin_Feb10
              Specifications:
                [SowingRule].Script.SowingRate=38
                [SowingRule].Script.CultivarName=Satin
                [SowingRule].Script.SowingDate=1987-02-10
            CompositeFactor Satin_Feb25
              Specifications:
                [SowingRule].Script.SowingRate=39
                [SowingRule].Script.CultivarName=Satin
                [SowingRule].Script.SowingDate=1987-02-25
            CompositeFactor Putland_Jan15
              Specifications:
                [SowingRule].Script.SowingRate=31.9
                [SowingRule].Script.CultivarName=Putland
                [SowingRule].Script.SowingDate=1987-01-15
            CompositeFactor Putland_Jan28
              Specifications:
                [SowingRule].Script.SowingRate=34.1
                [SowingRule].Script.CultivarName=Putland
                [SowingRule].Script.SowingDate=1987-01-28
            CompositeFactor Putland_Feb10
              Specifications:
                [SowingRule].Script.SowingRate=32.9
                [SowingRule].Script.CultivarName=Putland
                [SowingRule].Script.SowingDate=1987-02-10
            CompositeFactor Putland_Feb28
              Specifications:
                [SowingRule].Script.SowingRate=33.9
                [SowingRule].Script.CultivarName=Putland
                [SowingRule].Script.SowingDate=1987-02-25
      Simulation NT2
        Clock: Start=1987-01-01; End=1987-05-30
        Summary summaryfile
        Weather: FileName=DD8687.MET
        SoilArbitrator Soil Arbitrator
        Zone paddock: Area=1; Slope=0; AspectAngle=0; Altitude=50
          MicroClimate: a_interception=0; b_interception=1; c_interception=0; d_interception=0; soil_albedo=0.3; SoilHeatFluxFraction=0; MinimumHeightDiffForNewLayer=0; NightInterceptionFraction=0; ReferenceHeight=0
          Irrigation
          Fertiliser
          SurfaceOrganicMatter: InitialResidueName=wheat; InitialResidueType=wheat; InitialResidueMass=500; InitialStandingFraction=0; InitialCPR=0; InitialCNR=40
          Report DailyReport: same as Mungbean_REMS.aps18.aps18.paddock.DailyReport
          Manager SowingRule: same as Mungbean_REMS.NT10.NT10.paddock.SowingRule
          Manager HarvestRule: same as Mungbean_REMS.aps18.aps18.paddock.HarvestRule
          Report HarvestReport: same as Replacements.HarvestReport
          Plant Soybean
          Soil NT2_soil: Latitude=0; Longitude=0
            WaterBalance SoilWater: SummerDate=1-Nov; SummerU=1.5; SummerCona=6.6; WinterDate=1-Apr; WinterU=1.5; WinterCona=6.6; DiffusConst=88; DiffusSlope=35.4; Salb=0.2; CN2Bare=85; CNRed=20; CNCov=0.8; DischargeWidth=5; CatchmentArea=10; Thickness=[150, 150, 150, 150, 150, 150, 300, 300, 300]; SWCON=[0.7, 0.7, 0.7, 0.7, 0.7, 0.7, 0.7, 0.7, 0.7]
            CERESSoilTemperature Temperature
            Organic: same as Mungbean_REMS.aps18.aps18.paddock.soil.Organic
            Chemical: same as Mungbean_REMS.aps18.aps18.paddock.soil.Chemical
            Sample Initial conditions: Thickness=[150, 150, 150, 150, 150, 150, 300, 300, 300]; SWUnits=Volumetric; OCUnits=Total; PHUnits=Water
            Nutrient
            InitialWater Initial water: PercentMethod=1; FractionFull=1
            Physical
              Thickness  BD    AirDry  LL15   DUL    SAT
              150        1.56  0.053   0.19   0.304  0.315
              150        1.52  0.08    0.21   0.31   0.33
              150        1.46  0.21    0.21   0.31   0.337
              150        1.46  0.223   0.223  0.324  0.34
              150        1.42  0.219   0.219  0.328  0.34
              150        1.42  0.219   0.219  0.328  0.341
              300        1.46  0.219   0.219  0.325  0.344
              300        1.5   0.229   0.229  0.337  0.346
              300        1.53  0.237   0.237  0.35   0.37
              SoilCrop SoybeanSoil
                LL=[0.19, 0.21, 0.21, 0.235, 0.233, 0.242, 0.248, 0.277, 0.285]
                KL=[0.08, 0.08, 0.08, 0.08, 0.06, 0.04, 0.02, 0.01, 0.01]
                XF=[1, 1, 1, 1, 1, 1, 1, 0, 0]
    Experiment NT3
      Factors
        Permutation
          Factor Sow
            CompositeFactor King Planting 1
              Specifications:
                [SowingRule].Script.SowingRate=40
                [SowingRule].Script.CultivarName=King
                [SowingRule].Script.SowingDate=1987-01-19
            CompositeFactor King Planting 2
              Specifications:
                [SowingRule].Script.SowingRate=33.4
                [SowingRule].Script.CultivarName=King
                [SowingRule].Script.SowingDate=1987-01-30
            CompositeFactor King Planting 3
              Specifications:
                [SowingRule].Script.SowingRate=40
                [SowingRule].Script.CultivarName=King
                [SowingRule].Script.SowingDate=1987-02-15
            CompositeFactor Shangtung Planting 1
              Specifications:
                [SowingRule].Script.SowingRate=40
                [SowingRule].Script.CultivarName=Shangtung
                [SowingRule].Script.SowingDate=1987-01-19
            CompositeFactor Shangtung Planting 2
              Specifications:
                [SowingRule].Script.SowingRate=40
                [SowingRule].Script.CultivarName=Shangtung
                [SowingRule].Script.SowingDate=1987-01-30
            CompositeFactor Shangtung Planting 3
              Specifications:
                [SowingRule].Script.SowingRate=40
                [SowingRule].Script.CultivarName=Shangtung
                [SowingRule].Script.SowingDate=1987-02-15
      Simulation NT3
        Clock: Start=1986-09-07; End=1987-05-30
        Summary summaryfile
        Weather: FileName=KRC8687.MET
        SoilArbitrator Soil Arbitrator
        Zone paddock: Area=1; Slope=0; AspectAngle=0; Altitude=50
          MicroClimate: a_interception=0; b_interception=1; c_interception=0; d_interception=0; soil_albedo=0.3; SoilHeatFluxFraction=0; MinimumHeightDiffForNewLayer=0; NightInterceptionFraction=0; ReferenceHeight=0
          Irrigation
          Fertiliser
          SurfaceOrganicMatter: InitialResidueName=wheat; InitialResidueType=wheat; InitialResidueMass=500; InitialStandingFraction=0; InitialCPR=0; InitialCNR=40
          Report DailyReport: same as Mungbean_REMS.aps18.aps18.paddock.DailyReport
          Manager SowingRule
            SowingDate = 11/04/1993 00:00:00
            SowingRate = 38.2
            CultivarName = Berkin
            RowSpacing = 360
            SowingDepth = 30
            script: same as in Mungbean_REMS.aps18.aps18.paddock.SowingRule
          Manager HarvestRule: same as Mungbean_REMS.aps18.aps18.paddock.HarvestRule
          Report HarvestReport: same as Replacements.HarvestReport
          Plant Soybean
          Soil NT3_soil: same as Mungbean_REMS.NT10.NT10.paddock.NT10_soil
    Experiment NT4
      Factors
        Permutation
          Factor Sow
            CompositeFactor King_Jan4
              Specifications:
                [SowingRule].Script.SowingRate=40
                [SowingRule].Script.CultivarName=King
                [SowingRule].Script.SowingDate=1990-01-04
            CompositeFactor King_Jan17
              Specifications:
                [SowingRule].Script.SowingRate=40
                [SowingRule].Script.CultivarName=King
                [SowingRule].Script.SowingDate=1990-01-17
      Simulation NT4
        Clock: Start=1989-09-07; End=1990-05-30
        Summary summaryfile
        Weather: FileName=KRS8990.MET
        SoilArbitrator Soil Arbitrator
        Zone paddock: Area=1; Slope=0; AspectAngle=0; Altitude=50
          MicroClimate: a_interception=0; b_interception=1; c_interception=0; d_interception=0; soil_albedo=0.3; SoilHeatFluxFraction=0; MinimumHeightDiffForNewLayer=0; NightInterceptionFraction=0; ReferenceHeight=0
          Irrigation
          Fertiliser
          SurfaceOrganicMatter: InitialResidueName=wheat; InitialResidueType=wheat; InitialResidueMass=4000; InitialStandingFraction=0; InitialCPR=0; InitialCNR=40
          Report DailyReport: same as Mungbean_REMS.aps18.aps18.paddock.DailyReport
          Manager SowingRule: same as Mungbean_REMS.NT3.NT3.paddock.SowingRule
          Manager HarvestRule: same as Mungbean_REMS.aps18.aps18.paddock.HarvestRule
          Report HarvestReport: same as Replacements.HarvestReport
          Plant Soybean
          Manager Irrigate on fixed dates
            IrrigateDates = 22-dec
            Amount = 37
            Depth = 0
            Efficiency = 1
            WillRunoff = False
            script: same as in Mungbean_REMS.aps18.aps18.paddock.Irrigate on fixed dates
          Manager Irrigate on fixed dates1
            IrrigateDates = 14-dec
            Amount = 25
            Depth = 0
            Efficiency = 1
            WillRunoff = False
            script: same as in Mungbean_REMS.aps18.aps18.paddock.Irrigate on fixed dates
          Manager Irrigate on fixed dates2
            IrrigateDates = 27-dec
            Amount = 35
            Depth = 0
            Efficiency = 1
            WillRunoff = False
            script: same as in Mungbean_REMS.aps18.aps18.paddock.Irrigate on fixed dates
          Manager Irrigate on fixed dates3
            IrrigateDates = 03-jan, 04-jan, 13-feb
            Amount = 15
            Depth = 0
            Efficiency = 1
            WillRunoff = False
            script: same as in Mungbean_REMS.aps18.aps18.paddock.Irrigate on fixed dates
          Manager Irrigate on fixed dates4
            IrrigateDates = 06-jan
            Amount = 8
            Depth = 0
            Efficiency = 1
            WillRunoff = False
            script: same as in Mungbean_REMS.aps18.aps18.paddock.Irrigate on fixed dates
          Manager Irrigate on fixed dates5
            IrrigateDates = 17-jan
            Amount = 10
            Depth = 0
            Efficiency = 1
            WillRunoff = False
            script: same as in Mungbean_REMS.aps18.aps18.paddock.Irrigate on fixed dates
          Manager Irrigate on fixed dates6
            IrrigateDates = 20-jan
            Amount = 23
            Depth = 0
            Efficiency = 1
            WillRunoff = False
            script: same as in Mungbean_REMS.aps18.aps18.paddock.Irrigate on fixed dates
          Manager Irrigate on fixed dates7
            IrrigateDates = 26-jan
            Amount = 6
            Depth = 0
            Efficiency = 1
            WillRunoff = False
            script: same as in Mungbean_REMS.aps18.aps18.paddock.Irrigate on fixed dates
          Manager Irrigate on fixed dates8
            IrrigateDates = 30-jan
            Amount = 7
            Depth = 0
            Efficiency = 1
            WillRunoff = False
            script: same as in Mungbean_REMS.aps18.aps18.paddock.Irrigate on fixed dates
          Manager Irrigate on fixed dates9
            IrrigateDates = 06-feb
            Amount = 21
            Depth = 0
            Efficiency = 1
            WillRunoff = False
            script: same as in Mungbean_REMS.aps18.aps18.paddock.Irrigate on fixed dates
          Manager Irrigate on fixed dates10
            IrrigateDates = 09-feb
            Amount = 16
            Depth = 0
            Efficiency = 1
            WillRunoff = False
            script: same as in Mungbean_REMS.aps18.aps18.paddock.Irrigate on fixed dates
          Manager Irrigate on fixed dates11
            IrrigateDates = 13-feb
            Amount = 15
            Depth = 0
            Efficiency = 1
            WillRunoff = False
            script: same as in Mungbean_REMS.aps18.aps18.paddock.Irrigate on fixed dates
          Soil NT4_soil: same as Mungbean_REMS.NT10.NT10.paddock.NT10_soil
    Experiment NT5
      Factors
        Permutation
          Factor Cultivar
            CompositeFactor King
              Specifications:
                [SowingRule].Script.SowingRate=38
                [SowingRule].Script.CultivarName=King
                [SowingRule].Script.SowingDate=1991-01-15
            CompositeFactor Putland
              Specifications:
                [SowingRule].Script.SowingRate=26
                [SowingRule].Script.CultivarName=Putland
                [SowingRule].Script.SowingDate=1991-01-15
      Simulation NT5
        Clock: Start=1990-01-01; End=1991-12-30
        Summary summaryfile
        Weather: FileName=KRS9091.MET
        SoilArbitrator Soil Arbitrator
        Zone paddock: Area=1; Slope=0; AspectAngle=0; Altitude=50
          MicroClimate: a_interception=0; b_interception=1; c_interception=0; d_interception=0; soil_albedo=0.3; SoilHeatFluxFraction=0; MinimumHeightDiffForNewLayer=0; NightInterceptionFraction=0; ReferenceHeight=0
          Irrigation
          Fertiliser
          SurfaceOrganicMatter: InitialResidueName=wheat; InitialResidueType=wheat; InitialResidueMass=500; InitialStandingFraction=0; InitialCPR=0; InitialCNR=40
          Report DailyReport: same as Mungbean_REMS.aps18.aps18.paddock.DailyReport
          Manager SowingRule: same as Mungbean_REMS.NT3.NT3.paddock.SowingRule
          Manager HarvestRule: same as Mungbean_REMS.aps18.aps18.paddock.HarvestRule
          Report HarvestReport: same as Replacements.HarvestReport
          Plant Soybean
          Soil NT5_soil: same as Mungbean_REMS.NT10.NT10.paddock.NT10_soil
    Experiment NT9
      Factors
        Permutation
          Factor Sow
            CompositeFactor King_Jan15
              Specifications:
                [SowingRule].Script.CultivarName=King
                [SowingRule].Script.SowingDate=1988-01-15
            CompositeFactor King_Feb2
              Specifications:
                [SowingRule].Script.CultivarName=King
                [SowingRule].Script.SowingDate=1988-02-02
            CompositeFactor King_Feb16
              Specifications:
                [SowingRule].Script.CultivarName=King
                [SowingRule].Script.SowingDate=1988-02-16
            CompositeFactor Satin_Feb2
              Specifications:
                [SowingRule].Script.CultivarName=Satin
                [SowingRule].Script.SowingDate=1988-02-02
            CompositeFactor Satin_Feb16
              Specifications:
                [SowingRule].Script.CultivarName=Satin
                [SowingRule].Script.SowingDate=1988-02-16
            CompositeFactor Putland_Jan15
              Specifications:
                [SowingRule].Script.CultivarName=Putland
                [SowingRule].Script.SowingDate=1988-01-15
            CompositeFactor Putland_Feb2
              Specifications:
                [SowingRule].Script.CultivarName=Putland
                [SowingRule].Script.SowingDate=1988-02-02
            CompositeFactor Putland_Feb16
              Specifications:
                [SowingRule].Script.SowingDate=1988-02-16
                [SowingRule].Script.CultivarName=Putland
      Simulation NT9
        Clock: Start=1987-09-07; End=1988-06-18
        Summary summaryfile
        Weather: FileName=DD8788heather.MET
        SoilArbitrator Soil Arbitrator
        Zone paddock: Area=1; Slope=0; AspectAngle=0; Altitude=50
          MicroClimate: a_interception=0; b_interception=1; c_interception=0; d_interception=0; soil_albedo=0.3; SoilHeatFluxFraction=0; MinimumHeightDiffForNewLayer=0; NightInterceptionFraction=0; ReferenceHeight=0
          Irrigation
          Fertiliser
          SurfaceOrganicMatter: InitialResidueName=wheat; InitialResidueType=wheat; InitialResidueMass=500; InitialStandingFraction=0; InitialCPR=0; InitialCNR=40
          Report DailyReport: same as Mungbean_REMS.aps18.aps18.paddock.DailyReport
          Manager SowingRule
            SowingDate = 11/04/1993 00:00:00
            SowingRate = 40
            CultivarName = Berken
            RowSpacing = 360
            SowingDepth = 30
            script: same as in Mungbean_REMS.aps18.aps18.paddock.SowingRule
          Manager HarvestRule: same as Mungbean_REMS.aps18.aps18.paddock.HarvestRule
          Report HarvestReport: same as Replacements.HarvestReport
          Plant Soybean
          Soil NT9_soil: Latitude=0; Longitude=0
            WaterBalance SoilWater: same as Mungbean_REMS.NT2.NT2.paddock.NT2_soil.SoilWater
            CERESSoilTemperature Temperature
            Organic: same as Mungbean_REMS.aps18.aps18.paddock.soil.Organic
            Chemical: same as Mungbean_REMS.aps18.aps18.paddock.soil.Chemical
            Sample Initial conditions: same as Mungbean_REMS.NT10.NT10.paddock.NT10_soil.Initial conditions
            Nutrient
            Physical: same as Mungbean_REMS.NT2.NT2.paddock.NT2_soil.Physical
    Experiment RCM1
      Factors
        Permutation
          Factor Irrig: Specification=[Operations]
            Operations Full
              1980-04-07  [Irrigation].Apply(amount: 50)
              1980-04-14  [Irrigation].Apply(amount: 50)
              1980-04-28  [Irrigation].Apply(amount: 50)
              1980-05-05  [Irrigation].Apply(amount: 50)
            Operations Partial
              1980-04-07  [Irrigation].Apply(amount: 50)
              1980-04-14  [Irrigation].Apply(amount: 50)
            Operations Rainfed
              1980-05-05  [Irrigation].Apply(amount: 0)
      Simulation RCM1
        Clock: Start=1980-03-31; End=1980-08-18
        Summary summaryfile
        Weather: FileName=KUNUCLI.DAT
        SoilArbitrator Soil Arbitrator
        Zone paddock: Area=1; Slope=0; AspectAngle=0; Altitude=50
          MicroClimate: a_interception=0; b_interception=1; c_interception=0; d_interception=0; soil_albedo=0.3; SoilHeatFluxFraction=0; MinimumHeightDiffForNewLayer=0; NightInterceptionFraction=0; ReferenceHeight=0
          Irrigation
          Fertiliser
          SurfaceOrganicMatter: InitialResidueName=wheat; InitialResidueType=wheat; InitialResidueMass=500; InitialStandingFraction=0; InitialCPR=0; InitialCNR=40
          Report DailyReport: same as Mungbean_REMS.aps18.aps18.paddock.DailyReport
          Manager SowingRule
            SowingDate = 03/31/1980 00:00:00
            SowingRate = 35
            CultivarName = Berken
            RowSpacing = 250
            SowingDepth = 40
            script: same as in Mungbean_REMS.aps18.aps18.paddock.SowingRule
          Manager HarvestRule: same as Mungbean_REMS.aps18.aps18.paddock.HarvestRule
          Report HarvestReport: same as Replacements.HarvestReport
          Plant Soybean
          Soil RCM1_soil: Latitude=0; Longitude=0
            InitialWater Initial water: PercentMethod=1; FractionFull=1
            WaterBalance SoilWater: same as Mungbean_REMS.aps18.aps18.paddock.soil.SoilWater
            CERESSoilTemperature Temperature
            Organic: same as Mungbean_REMS.aps18.aps18.paddock.soil.Organic
            Chemical: same as Mungbean_REMS.aps18.aps18.paddock.soil.Chemical
            Sample Initial conditions: Depth=[0-180]; Thickness=[1800]; NH4=[1]; SWUnits=Volumetric; OCUnits=Total; PHUnits=Water
            Nutrient
            Physical: same as Mungbean_REMS.NT10.NT10.paddock.NT10_soil.Physical
          Manager IrrigationRule
            IrrigateDates = 24-jan
            Amount = 0
            Depth = 0
            Efficiency = 1
            WillRunoff = False
            script: same as in Mungbean_REMS.aps18.aps18.paddock.Irrigate on fixed dates
          Operations
    Experiment RCM2
      Factors
        Permutation
          Factor Sow
            CompositeFactor 10: Specifications=[SowingRule].Script.SowingRate=10
            CompositeFactor 19: Specifications=[SowingRule].Script.SowingRate=19
            CompositeFactor 27: Specifications=[SowingRule].Script.SowingRate=27
            CompositeFactor 39: Specifications=[SowingRule].Script.SowingRate=39
            CompositeFactor 50: Specifications=[SowingRule].Script.SowingRate=50
      Simulation RCM2
        Clock: Start=1980-01-11; End=1980-05-30
        Summary summaryfile
        Weather: FileName=KUNUCLI.DAT
        SoilArbitrator Soil Arbitrator
        Zone paddock: Area=1; Slope=0; AspectAngle=0; Altitude=50
          MicroClimate: a_interception=0; b_interception=1; c_interception=0; d_interception=0; soil_albedo=0.3; SoilHeatFluxFraction=0; MinimumHeightDiffForNewLayer=0; NightInterceptionFraction=0; ReferenceHeight=0
          Irrigation
          Fertiliser
          SurfaceOrganicMatter: InitialResidueName=wheat; InitialResidueType=wheat; InitialResidueMass=500; InitialStandingFraction=0; InitialCPR=0; InitialCNR=40
          Report DailyReport: same as Mungbean_REMS.aps18.aps18.paddock.DailyReport
          Manager SowingRule
            SowingDate = 01/11/1980 00:00:00
            SowingRate = 35
            CultivarName = Berken
            RowSpacing = 250
            SowingDepth = 40
            script: same as in Mungbean_REMS.aps18.aps18.paddock.SowingRule
          Manager HarvestRule: same as Mungbean_REMS.aps18.aps18.paddock.HarvestRule
          Report HarvestReport: same as Replacements.HarvestReport
          Plant Soybean
          Soil RCM1_soil: same as Mungbean_REMS.RCM1.RCM1.paddock.RCM1_soil
    Experiment RCM_Katherine87
      Factors
        Permutation
          Factor Sow: Specification=[Operations]
            Operations 18_Dec1_3irr
              1987-12-07  [Irrigation].Apply(amount: 12)
              1987-12-08  [Irrigation].Apply(amount: 15)
              1987-12-10  [Irrigation].Apply(amount: 15)
              1987-12-01  [Soybean].Sow(population: 18, cultivar: "King", depth: 40, rowSpacing: 500);
            Operations 35_Jan5_5irr
              1988-01-05  [Soybean].Sow(population: 35, cultivar: "King", depth: 40, rowSpacing: 360);
              1988-01-06  [Irrigation].Apply(amount: 11)
              1988-01-08  [Irrigation].Apply(amount: 13)
              1988-01-07  [Irrigation].Apply(amount: 12)
              1988-01-13  [Irrigation].Apply(amount: 25)
              1988-01-18  [Irrigation].Apply(amount: 33)
            Operations 35_Jan5_1irr
              1988-01-05  [Soybean].Sow(population: 35, cultivar: "King", depth: 40, rowSpacing: 360);
              1988-01-06  [Irrigation].Apply(amount: 11)
      Simulation RCM_Katherine87
        Clock: Start=1987-12-01; End=1988-05-25
        Summary summaryfile
        Weather: FileName=kath8788.met
        SoilArbitrator Soil Arbitrator
        Zone paddock: Area=1; Slope=0; AspectAngle=0; Altitude=50
          MicroClimate: a_interception=0; b_interception=1; c_interception=0; d_interception=0; soil_albedo=0.3; SoilHeatFluxFraction=0; MinimumHeightDiffForNewLayer=0; NightInterceptionFraction=0; ReferenceHeight=0
          Irrigation
          Fertiliser
          SurfaceOrganicMatter: InitialResidueName=wheat; InitialResidueType=wheat; InitialResidueMass=500; InitialStandingFraction=0; InitialCPR=0; InitialCNR=40
          Report DailyReport: same as Mungbean_REMS.aps18.aps18.paddock.DailyReport
          Manager SowingRule
            SowingDate = 03/31/1980 00:00:00
            SowingRate = 35
            CultivarName = King
            RowSpacing = 360
            SowingDepth = 40
            script: same as in Mungbean_REMS.aps18.aps18.paddock.SowingRule
          Manager HarvestRule: same as Mungbean_REMS.aps18.aps18.paddock.HarvestRule
          Report HarvestReport: same as Replacements.HarvestReport
          Plant Soybean
          Soil Katherine_soil: same as Mungbean_REMS.RCM1.RCM1.paddock.RCM1_soil
          Manager Irrigatefixeddates
            IrrigateDates = 27-oct
            Amount = 0
            Depth = 0
            Efficiency = 1
            WillRunoff = False
            script: same as in Mungbean_REMS.aps18.aps18.paddock.Irrigate on fixed dates
          Operations
    Experiment RCM_Katherine89
      Factors
        Permutation
          Factor Sow: Specification=[Operations]
            Operations Jan10_1irr
              1989-01-10  [Soybean].Sow(population: 35, cultivar: "King", depth: 40, rowSpacing: 360);
              1989-01-15  [Irrigation].Apply(amount: 17)
            Operations Feb7_no_irr
              1989-02-07  [Soybean].Sow(population: 35, cultivar: "King", depth: 40, rowSpacing: 360);
            Operations Feb28_24irr
              1989-02-28  [Soybean].Sow(population: 35, cultivar: "King", depth: 40, rowSpacing: 360);
              1989-04-05  [Irrigation].Apply(amount: 26)
              1989-04-07  [Irrigation].Apply(amount: 30)
              1989-04-10  [Irrigation].Apply(amount: 14)
              1989-04-12  [Irrigation].Apply(amount: 24)
              1989-04-15  [Irrigation].Apply(amount: 42)
              1989-04-19  [Irrigation].Apply(amount: 13)
              1989-04-22  [Irrigation].Apply(amount: 27)
              1989-04-26  [Irrigation].Apply(amount: 32)
              1989-04-29  [Irrigation].Apply(amount: 43)
              1989-05-06  [Irrigation].Apply(amount: 39)
              1989-05-10  [Irrigation].Apply(amount: 35)
              1989-05-13  [Irrigation].Apply(amount: 34)
              1989-05-17  [Irrigation].Apply(amount: 33)
              1989-05-20  [Irrigation].Apply(amount: 38)
              1989-05-24  [Irrigation].Apply(amount: 34)
              1989-05-27  [Irrigation].Apply(amount: 33)
              1989-05-31  [Irrigation].Apply(amount: 34)
              1989-06-03  [Irrigation].Apply(amount: 28)
              1989-06-07  [Irrigation].Apply(amount: 27)
              1989-06-10  [Irrigation].Apply(amount: 27)
              1989-06-15  [Irrigation].Apply(amount: 28)
              1989-06-17  [Irrigation].Apply(amount: 26)
              1989-06-21  [Irrigation].Apply(amount: 23)
              1989-06-24  [Irrigation].Apply(amount: 22)
            Operations Feb28_2irr
              1989-02-28  [Soybean].Sow(population: 35, cultivar: "King", depth: 40, rowSpacing: 360);
              1989-04-19  [Irrigation].Apply(amount: 44)
              1989-05-20  [Irrigation].Apply(amount: 38)
      Simulation RCM_Katherine89
        Clock: Start=1989-01-10; End=1989-06-30
        Summary summaryfile
        Weather: FileName=kath89.met
        SoilArbitrator Soil Arbitrator
        Zone paddock: same as Mungbean_REMS.RCM_Katherine87.RCM_Katherine87.paddock
    Experiment RJL1_Dalby_doub_76
      Factors
        Permutation
          Factor Irr: Specification=[Operations]
            Operations Yes
              1976-12-10  [Soybean].Sow(population: 18.5, cultivar: "Berken", depth: 40, rowSpacing: 600);
              1976-12-14  [Irrigation].Apply(amount: 30)
              1977-01-05  [Irrigation].Apply(amount: 30)
              1977-01-28  [Irrigation].Apply(amount: 30)
              1977-02-03  [Irrigation].Apply(amount: 30)
              1977-02-19  [Irrigation].Apply(amount: 30)
            Operations No
              1976-12-10  [Soybean].Sow(population: 18.5, cultivar: "Berken", depth: 40, rowSpacing: 600);
      Simulation RJL_afterwintercereal1976
        Clock: Start=1976-09-25; End=1977-03-11
        Summary summaryfile
        Weather: FileName=dalby25.met
        SoilArbitrator Soil Arbitrator
        Zone paddock: Area=1; Slope=0; AspectAngle=0; Altitude=50
          MicroClimate: a_interception=0; b_interception=1; c_interception=0; d_interception=0; soil_albedo=0.3; SoilHeatFluxFraction=0; MinimumHeightDiffForNewLayer=0; NightInterceptionFraction=0; ReferenceHeight=0
          Irrigation
          Fertiliser
          SurfaceOrganicMatter: InitialResidueName=wheat; InitialResidueType=wheat; InitialResidueMass=1500; InitialStandingFraction=0; InitialCPR=0; InitialCNR=70
          Report DailyReport: same as Mungbean_REMS.aps18.aps18.paddock.DailyReport
          Manager SowingRule
            SowingDate = 09/12/1976 00:00:00
            SowingRate = 18.5
            CultivarName = Berken
            RowSpacing = 600
            SowingDepth = 40
            script: same as in Mungbean_REMS.aps18.aps18.paddock.SowingRule
          Manager HarvestRule: same as Mungbean_REMS.aps18.aps18.paddock.HarvestRule
          Report HarvestReport: same as Replacements.HarvestReport
          Plant Soybean
          Soil: Latitude=0; Longitude=0
            WaterBalance SoilWater: same as Mungbean_REMS.aps20.aps20.paddock.APS20_soil.SoilWater
            CERESSoilTemperature Temperature
            Organic: same as Mungbean_REMS.aps20.aps20.paddock.APS20_soil.Organic
            Chemical: same as Mungbean_REMS.aps20.aps20.paddock.APS20_soil.Chemical
            Sample Initial conditions: Thickness=[150, 150, 300, 300, 300, 300, 300]; SW=[0.22, 0.342, 0.385, 0.386, 0.429, 0.43, 0.43]; SWUnits=Volumetric; OCUnits=Total; PHUnits=Water
            Nutrient
            Physical
              Thickness  BD    AirDry  LL15   DUL    SAT
              150        1     0.1     0.231  0.518  0.53
              150        1.01  0.209   0.209  0.534  0.55
              300        1.02  0.32    0.323  0.538  0.55
              300        1.07  0.32    0.349  0.578  0.59
              300        1.15  0.32    0.378  0.56   0.566
              300        1.33  0.32    0.43   0.47   0.498
              300        1.33  0.32    0.43   0.47   0.498
              SoilCrop SoybeanSoil: LL=[0.22, 0.342, 0.385, 0.386, 0.429, 0.43, 0.43]; KL=[0.08, 0.08, 0.08, 0.06, 0.04, 0.02, 0.01]; XF=[1, 1, 1, 1, 1, 1, 1]
          Operations
    Experiment RJL1_Dalby_doub_78
      Factors
        Permutation
          Factor Irr: Specification=[Operations]
            Operations Yes
              1978-01-10  [Irrigation].Apply(amount: 50)
              1978-02-08  [Irrigation].Apply(amount: 30)
              1978-02-20  [Irrigation].Apply(amount: 30)
              1978-03-09  [Irrigation].Apply(amount: 30)
              1978-03-24  [Irrigation].Apply(amount: 30)
            Operations No
      Simulation RJL_afterwintercereal1978
        Clock: Start=1978-01-01; End=1978-05-31
        Summary summaryfile
        Weather: FileName=dalby25.met
        SoilArbitrator Soil Arbitrator
        Zone paddock: Area=1; Slope=0; AspectAngle=0; Altitude=50
          MicroClimate: a_interception=0; b_interception=1; c_interception=0; d_interception=0; soil_albedo=0.3; SoilHeatFluxFraction=0; MinimumHeightDiffForNewLayer=0; NightInterceptionFraction=0; ReferenceHeight=0
          Irrigation
          Fertiliser
          SurfaceOrganicMatter: InitialResidueName=wheat; InitialResidueType=wheat; InitialResidueMass=1500; InitialStandingFraction=0; InitialCPR=0; InitialCNR=70
          Report DailyReport: same as Mungbean_REMS.aps18.aps18.paddock.DailyReport
          Manager SowingRule
            RowSpacing = 600
            SowingDepth = 40
            SowingRate = 10
            CultivarName = Berken
            SowingDate = 10/01/1978 00:00:00
            script: same as in Mungbean_REMS.aps18.aps18.paddock.SowingRule
          Manager HarvestRule: same as Mungbean_REMS.aps18.aps18.paddock.HarvestRule
          Report HarvestReport: same as Replacements.HarvestReport
          Plant Soybean
          Soil: same as Mungbean_REMS.RJL1_Dalby_doub_76.RJL_afterwintercereal1976.paddock.soil
          Operations
    Experiment RJL2
      Factors
        Permutation
          Factor Sow
            CompositeFactor 20p_100cm_Nov18
              Specifications:
                [SowingRule].Script.SowingRate=20
                [SowingRule].Script.RowSpacing=1000
                [SowingRule].Script.SowingDate=1976-11-18
            CompositeFactor 27p_75cm_Jan24
              Specifications:
                [SowingRule].Script.SowingRate=27
                [SowingRule].Script.RowSpacing=750
                [SowingRule].Script.SowingDate=1977-01-24
            CompositeFactor 40p_50cm_Jan24
              Specifications:
                [SowingRule].Script.SowingRate=40
                [SowingRule].Script.RowSpacing=500
                [SowingRule].Script.SowingDate=1977-01-24
            CompositeFactor 80p_25cm_Jan24
              Specifications:
                [SowingRule].Script.SowingRate=80
                [SowingRule].Script.RowSpacing=250
                [SowingRule].Script.SowingDate=1977-01-24
            CompositeFactor 27p_75cm_Nov18
              Specifications:
                [SowingRule].Script.SowingRate=27
                [SowingRule].Script.RowSpacing=750
                [SowingRule].Script.SowingDate=1976-11-18
            CompositeFactor 40p_50cm_Nov18
              Specifications:
                [SowingRule].Script.SowingRate=40
                [SowingRule].Script.RowSpacing=500
                [SowingRule].Script.SowingDate=1976-11-18
            CompositeFactor 80p_25cm_Nov18
              Specifications:
                [SowingRule].Script.SowingRate=80
                [SowingRule].Script.RowSpacing=250
                [SowingRule].Script.SowingDate=1976-11-18
            CompositeFactor 20p_100cm_Dec20
              Specifications:
                [SowingRule].Script.SowingRate=20
                [SowingRule].Script.RowSpacing=1000
                [SowingRule].Script.SowingDate=1976-12-20
            CompositeFactor 27p_75cm_Dec20
              Specifications:
                [SowingRule].Script.SowingRate=27
                [SowingRule].Script.RowSpacing=750
                [SowingRule].Script.SowingDate=1976-12-20
            CompositeFactor 40p_50cm_Dec20
              Specifications:
                [SowingRule].Script.SowingRate=40
                [SowingRule].Script.RowSpacing=500
                [SowingRule].Script.SowingDate=1976-12-20
            CompositeFactor 80p_25cm_Dec20
              Specifications:
                [SowingRule].Script.SowingRate=80
                [SowingRule].Script.RowSpacing=250
                [SowingRule].Script.SowingDate=1976-12-20
            CompositeFactor 20p_100cm_Jan24
              Specifications:
                [SowingRule].Script.SowingRate=20
                [SowingRule].Script.RowSpacing=1000
                [SowingRule].Script.SowingDate=1977-1-24
      Simulation RJL_afterwintercereal
        Clock: Start=1976-11-18; End=1977-04-30
        Summary summaryfile
        Weather: FileName=cooper.aps
        SoilArbitrator Soil Arbitrator
        Zone paddock: Area=1; Slope=0; AspectAngle=0; Altitude=50
          MicroClimate: a_interception=0; b_interception=1; c_interception=0; d_interception=0; soil_albedo=0.3; SoilHeatFluxFraction=0; MinimumHeightDiffForNewLayer=0; NightInterceptionFraction=0; ReferenceHeight=0
          Irrigation
          Fertiliser
          SurfaceOrganicMatter: InitialResidueName=wheat; InitialResidueType=wheat; InitialResidueMass=500; InitialStandingFraction=0; InitialCPR=0; InitialCNR=40
          Report DailyReport: same as Mungbean_REMS.aps18.aps18.paddock.DailyReport
          Manager SowingRule: same as Mungbean_REMS.RJL1_Dalby_doub_76.RJL_afterwintercereal1976.paddock.SowingRule
          Manager HarvestRule: same as Mungbean_REMS.aps18.aps18.paddock.HarvestRule
          Report HarvestReport: same as Replacements.HarvestReport
          Plant Soybean
          Soil: Latitude=0; Longitude=0
            InitialWater Initial water: PercentMethod=1; FractionFull=1
            WaterBalance SoilWater: SummerDate=1-Nov; SummerU=6; SummerCona=3.5; WinterDate=1-Apr; WinterU=6; WinterCona=3.5; DiffusConst=40; DiffusSlope=16; Salb=0.13; CN2Bare=75; CNRed=20; CNCov=0.8; DischargeWidth=5; CatchmentArea=10; Thickness=[150, 150, 300, 300, 300, 300, 300]; SWCON=[0.3, 0.3, 0.3, 0.3, 0.3, 0.3, 0.3]
            CERESSoilTemperature Temperature
            Organic: FOMCNRatio=33
              Thickness  Carbon  SoilCNRatio  FBiom  FInert  FOM
              150        1       14.5         0.05   0.39    0
              150        0.64    14.5         0.02   0.47    0
              300        0.64    14.5         0.015  0.6     0
              300        0.47    14.5         0.01   0.83    0
              300        0.47    14.5         0.01   0.93    0
              300        0.35    14.5         0.01   0.93    0
              300        0.26    14.5         0.01   0.93    0
            Chemical
              Thickness  NO3N  NH4N  PH
              150        2     1     6.5
              150        2     1     6.2
              300        2     1     6.2
              300        2     1     6.3
              300        2     1     6.3
              300        2     1     6.4
              300        2     1     6.5
            Sample Initial conditions: Depth=[0-180]; Thickness=[1800]; NH4=[1]; SWUnits=Volumetric; OCUnits=Total; PHUnits=Water
            Nutrient
            Physical
              Thickness  BD   AirDry  LL15  DUL    SAT
              150        1.2  0.1     0.2   0.413  0.453
              150        1.2  0.26    0.28  0.454  0.504
              300        1.2  0.32    0.34  0.495  0.545
              300        1.2  0.3     0.32  0.495  0.545
              300        1.3  0.27    0.29  0.418  0.468
              300        1.3  0.24    0.26  0.406  0.457
              300        1.3  0.31    0.33  0.385  0.435
              SoilCrop SoybeanSoil: LL=[0.2, 0.28, 0.34, 0.34, 0.34, 0.4, 0.38]; KL=[0.08, 0.06, 0.04, 0.08, 0.06, 0.04, 0.02]; XF=[1, 1, 1, 0, 0, 0, 0]
    Simulation RCM_Gatton
      Clock: Start=1990-01-09; End=1990-05-16
      Summary summaryfile
      Weather: FileName=gatt90.met
      SoilArbitrator Soil Arbitrator
      Zone paddock: Area=1; Slope=0; AspectAngle=0; Altitude=50
        MicroClimate: a_interception=0; b_interception=1; c_interception=0; d_interception=0; soil_albedo=0.3; SoilHeatFluxFraction=0; MinimumHeightDiffForNewLayer=0; NightInterceptionFraction=0; ReferenceHeight=0
        Irrigation
        Fertiliser
        SurfaceOrganicMatter: InitialResidueName=wheat; InitialResidueType=wheat; InitialResidueMass=500; InitialStandingFraction=0; InitialCPR=0; InitialCNR=40
        Report DailyReport: same as Mungbean_REMS.aps18.aps18.paddock.DailyReport
        Manager SowingRule
          SowingDate = 09/01/1990 00:00:00
          SowingRate = 35
          CultivarName = King
          RowSpacing = 360
          SowingDepth = 40
          script: same as in Mungbean_REMS.aps18.aps18.paddock.SowingRule
        Manager HarvestRule: same as Mungbean_REMS.aps18.aps18.paddock.HarvestRule
        Report HarvestReport: same as Replacements.HarvestReport
        Plant Soybean
        Soil gatton_soil: same as Mungbean_REMS.RJL2.RJL_afterwintercereal.paddock.soil
        Manager Irrigate on fixed dates
          IrrigateDates = 10-jan
          Amount = 18
          Depth = 0
          Efficiency = 1
          WillRunoff = False
          script: same as in Mungbean_REMS.aps18.aps18.paddock.Irrigate on fixed dates
        Manager Irrigate on fixed dates1
          IrrigateDates = 12-jan, 23-mar
          Amount = 25
          Depth = 0
          Efficiency = 1
          WillRunoff = False
          script: same as in Mungbean_REMS.aps18.aps18.paddock.Irrigate on fixed dates
        Manager Irrigate on fixed dates2
          IrrigateDates = 23-jan, 21-mar
          Amount = 10
          Depth = 0
          Efficiency = 1
          WillRunoff = False
          script: same as in Mungbean_REMS.aps18.aps18.paddock.Irrigate on fixed dates
        Manager Irrigate on fixed dates3
          IrrigateDates = 24-jan
          Amount = 11
          Depth = 0
          Efficiency = 1
          WillRunoff = False
          script: same as in Mungbean_REMS.aps18.aps18.paddock.Irrigate on fixed dates
        Manager Irrigate on fixed dates4
          IrrigateDates = 26-jan
          Amount = 16
          Depth = 0
          Efficiency = 1
          WillRunoff = False
          script: same as in Mungbean_REMS.aps18.aps18.paddock.Irrigate on fixed dates
        Manager Irrigate on fixed dates5
          IrrigateDates = 31-jan
          Amount = 14
          Depth = 0
          Efficiency = 1
          WillRunoff = False
          script: same as in Mungbean_REMS.aps18.aps18.paddock.Irrigate on fixed dates
        Manager Irrigate on fixed dates6
          IrrigateDates = 02-Feb
          Amount = 23
          Depth = 0
          Efficiency = 1
          WillRunoff = False
          script: same as in Mungbean_REMS.aps18.aps18.paddock.Irrigate on fixed dates
        Manager Irrigate on fixed dates7
          IrrigateDates = 16-feb, 12-mar
          Amount = 26
          Depth = 0
          Efficiency = 1
          WillRunoff = False
          script: same as in Mungbean_REMS.aps18.aps18.paddock.Irrigate on fixed dates
        Manager Irrigate on fixed dates8
          IrrigateDates = 01-mar
          Amount = 31
          Depth = 0
          Efficiency = 1
          WillRunoff = False
          script: same as in Mungbean_REMS.aps18.aps18.paddock.Irrigate on fixed dates
        Manager Irrigate on fixed dates9
          IrrigateDates = 08-mar
          Amount = 21
          Depth = 0
          Efficiency = 1
          WillRunoff = False
          script: same as in Mungbean_REMS.aps18.aps18.paddock.Irrigate on fixed dates
        Manager Irrigate on fixed dates10
          IrrigateDates = 12-mar
          Amount = 26
          Depth = 0
          Efficiency = 1
          WillRunoff = False
          script: same as in Mungbean_REMS.aps18.aps18.paddock.Irrigate on fixed dates
        Manager Irrigate on fixed dates11
          IrrigateDates = 16-mar
          Amount = 24
          Depth = 0
          Efficiency = 1
          WillRunoff = False
          script: same as in Mungbean_REMS.aps18.aps18.paddock.Irrigate on fixed dates
    Simulation RJL_afterwinterfallow1976
      Clock: Start=1976-04-09; End=1977-03-11
      Summary summaryfile
      Weather: FileName=dalby25.met
      SoilArbitrator Soil Arbitrator
      Zone paddock: Area=1; Slope=0; AspectAngle=0; Altitude=50
        MicroClimate: a_interception=0; b_interception=1; c_interception=0; d_interception=0; soil_albedo=0.3; SoilHeatFluxFraction=0; MinimumHeightDiffForNewLayer=0; NightInterceptionFraction=0; ReferenceHeight=0
        Irrigation
        Fertiliser
        SurfaceOrganicMatter: InitialResidueName=sorghum; InitialResidueType=sorghum; InitialResidueMass=5000; InitialStandingFraction=0; InitialCPR=0; InitialCNR=70
        Report DailyReport: same as Mungbean_REMS.aps18.aps18.paddock.DailyReport
        Manager SowingRule
          SowingDate = 12/09/1976 00:00:00
          SowingRate = 18.5
          CultivarName = Berken
          RowSpacing = 600
          SowingDepth = 40
          script: same as in Mungbean_REMS.aps18.aps18.paddock.SowingRule
        Manager HarvestRule: same as Mungbean_REMS.aps18.aps18.paddock.HarvestRule
        Report HarvestReport: same as Replacements.HarvestReport
        Plant Soybean
        Soil: same as Mungbean_REMS.RJL1_Dalby_doub_76.RJL_afterwintercereal1976.paddock.soil
        Operations
    Simulation RJL_afterwinterfallow1978
      Clock: Start=1977-04-10; End=1978-05-31
      Summary summaryfile
      Weather: FileName=dalby25.met
      SoilArbitrator Soil Arbitrator
      Zone paddock: Area=1; Slope=0; AspectAngle=0; Altitude=50
        MicroClimate: a_interception=0; b_interception=1; c_interception=0; d_interception=0; soil_albedo=0.3; SoilHeatFluxFraction=0; MinimumHeightDiffForNewLayer=0; NightInterceptionFraction=0; ReferenceHeight=0
        Irrigation
        Fertiliser
        SurfaceOrganicMatter: InitialResidueName=sorghum; InitialResidueType=sorghum; InitialResidueMass=5000; InitialStandingFraction=0; InitialCPR=0; InitialCNR=70
        Report DailyReport: same as Mungbean_REMS.aps18.aps18.paddock.DailyReport
        Manager SowingRule
          SowingDate = 01/10/1978 00:00:00
          SowingRate = 10
          CultivarName = Berken
          RowSpacing = 600
          SowingDepth = 40
          script: same as in Mungbean_REMS.aps18.aps18.paddock.SowingRule
        Manager HarvestRule: same as Mungbean_REMS.aps18.aps18.paddock.HarvestRule
        Report HarvestReport: same as Replacements.HarvestReport
        Plant Soybean
        Soil: same as Mungbean_REMS.RJL1_Dalby_doub_76.RJL_afterwintercereal1976.paddock.soil
        Manager Irrigate on fixed dates
          IrrigateDates = 10-jan
          Amount = 50
          Depth = 0
          Efficiency = 1
          WillRunoff = False
          script: same as in Mungbean_REMS.aps18.aps18.paddock.Irrigate on fixed dates
        Operations
  Folder Mungbean_jngh
    Memo Mungbean_jngh data description
      These trials ([Robinsonetal_2002]) were used to calibrate the original mungbean model. They focused on irrigated vs. rainfed vs. rainout shelter, although all had irrigation to some extent.
      They also had different sowing dates.
      There were 2 cultivars in the original model (Emerald and Emerald_sf), but we only have data for one.
    Experiment jngh
      Factors
        Permutation
          Factor Sow: Specification=[Operations]
            CompositeFactor Dec4Irr
              Specifications:
                [SowingRule].Script.SowingDate=1997-12-4
              Operations _
                1997-12-04  [Irrigation].Apply(amount: 40)
                1997-12-18  [Irrigation].Apply(amount: 20)
                1998-01-02  [Irrigation].Apply(amount: 20)
                1998-01-06  [Irrigation].Apply(amount: 25)
                1998-01-13  [Irrigation].Apply(amount: 25)
                1998-01-19  [Irrigation].Apply(amount: 30)
                1998-01-27  [Irrigation].Apply(amount: 25)
                1998-02-06  [Irrigation].Apply(amount: 20)
                1998-02-27  [Irrigation].Apply(amount: 15)
                1998-03-06  [Irrigation].Apply(amount: 33)
                1998-03-13  [Irrigation].Apply(amount: 25)
                1998-03-19  [Irrigation].Apply(amount: 20)
                1998-03-27  [Irrigation].Apply(amount: 25)
            CompositeFactor Dec18Irr: Specifications=[SowingRule].Script.SowingDate=1997-12-18
              Operations _
                1997-12-04  [Irrigation].Apply(amount: 40)
                1997-12-18  [Irrigation].Apply(amount: 20)
                1998-01-02  [Irrigation].Apply(amount: 20)
                1998-01-06  [Irrigation].Apply(amount: 25)
                1998-01-13  [Irrigation].Apply(amount: 25)
                1998-01-19  [Irrigation].Apply(amount: 30)
            CompositeFactor Dec31Irr: Specifications=[SowingRule].Script.SowingDate=1997-12-31
              Operations _
                1997-12-04  [Irrigation].Apply(amount: 40)
                1997-12-18  [Irrigation].Apply(amount: 20)
                1997-12-31  [Irrigation].Apply(amount: 25)
                1998-01-02  [Irrigation].Apply(amount: 20)
                1998-01-06  [Irrigation].Apply(amount: 25)
                1998-01-13  [Irrigation].Apply(amount: 25)
                1998-01-19  [Irrigation].Apply(amount: 30)
                1998-01-27  [Irrigation].Apply(amount: 25)
                1998-02-06  [Irrigation].Apply(amount: 20)
                1998-02-27  [Irrigation].Apply(amount: 15)
                1998-03-06  [Irrigation].Apply(amount: 33)
                1998-03-13  [Irrigation].Apply(amount: 25)
                1998-03-19  [Irrigation].Apply(amount: 20)
                1998-03-27  [Irrigation].Apply(amount: 25)
            CompositeFactor Dec4RF: Specifications=[SowingRule].Script.SowingDate=1997-12-4
              Operations RF: same as Mungbean_jngh.jngh.Factors.Permutation.Sow.Dec18Irr._
            CompositeFactor Dec18RF: same as Mungbean_jngh.jngh.Factors.Permutation.Sow.Dec18Irr
            CompositeFactor Dec31RF: Specifications=[SowingRule].Script.SowingDate=1997-12-31
              Operations _
                1997-12-04  [Irrigation].Apply(amount: 40)
                1997-12-18  [Irrigation].Apply(amount: 20)
                1997-12-31  [Irrigation].Apply(amount: 25)
                1998-01-02  [Irrigation].Apply(amount: 20)
                1998-01-06  [Irrigation].Apply(amount: 25)
                1998-01-13  [Irrigation].Apply(amount: 25)
                1998-01-19  [Irrigation].Apply(amount: 30)
            CompositeFactor Dec4RO: Specifications=[SowingRule].Script.SowingDate=1997-12-4
              Operations _
                1997-12-04  [Irrigation].Apply(amount: 40)
                1997-12-08  [Irrigation].Apply(amount: 20)
                1997-12-12  [Irrigation].Apply(amount: 40)
                1997-12-15  [Irrigation].Apply(amount: 20)
                1997-12-18  [Irrigation].Apply(amount: 33)
                1997-12-23  [Irrigation].Apply(amount: 20)
                1997-12-26  [Irrigation].Apply(amount: 13)
                1998-01-02  [Irrigation].Apply(amount: 6.6)
                1998-01-06  [Irrigation].Apply(amount: 26)
                1998-01-13  [Irrigation].Apply(amount: 13)
                1998-01-19  [Irrigation].Apply(amount: 20)
                1998-02-18  [Irrigation].Apply(amount: 16)
                1998-02-19  [Irrigation].Apply(amount: 59)
                1998-02-20  [Irrigation].Apply(amount: 25)
                1998-02-24  [Irrigation].Apply(amount: 33)
                1998-03-06  [Irrigation].Apply(amount: 33)
                1998-03-11  [Irrigation].Apply(amount: 33)
                1998-03-19  [Irrigation].Apply(amount: 33)
            CompositeFactor Dec18RO: Specifications=[SowingRule].Script.SowingDate=1997-12-18
              Operations _
                1997-12-18  [Irrigation].Apply(amount: 66)
                1997-12-23  [Irrigation].Apply(amount: 20)
                1997-12-26  [Irrigation].Apply(amount: 13)
                1998-01-02  [Irrigation].Apply(amount: 6.6)
                1998-01-06  [Irrigation].Apply(amount: 26)
                1998-01-13  [Irrigation].Apply(amount: 13)
                1998-01-19  [Irrigation].Apply(amount: 20)
                1998-02-18  [Irrigation].Apply(amount: 16)
                1998-02-19  [Irrigation].Apply(amount: 59)
                1998-02-20  [Irrigation].Apply(amount: 25)
                1998-02-24  [Irrigation].Apply(amount: 33)
                1998-03-06  [Irrigation].Apply(amount: 33)
                1998-03-11  [Irrigation].Apply(amount: 33)
                1998-03-19  [Irrigation].Apply(amount: 33)
            CompositeFactor Dec31RO: Specifications=[SowingRule].Script.SowingDate=1997-12-31
              Operations _
                1997-12-31  [Irrigation].Apply(amount: 17)
                1998-01-01  [Irrigation].Apply(amount: 33)
                1998-01-02  [Irrigation].Apply(amount: 30)
                1998-01-06  [Irrigation].Apply(amount: 26)
                1998-01-13  [Irrigation].Apply(amount: 13)
                1998-01-19  [Irrigation].Apply(amount: 20)
                1998-02-18  [Irrigation].Apply(amount: 16)
                1998-02-19  [Irrigation].Apply(amount: 59)
                1998-02-20  [Irrigation].Apply(amount: 25)
                1998-02-24  [Irrigation].Apply(amount: 33)
                1998-03-06  [Irrigation].Apply(amount: 33)
                1998-03-11  [Irrigation].Apply(amount: 33)
                1998-03-19  [Irrigation].Apply(amount: 33)
      Simulation jngh
        Summary summaryfile
        SoilArbitrator Soil Arbitrator
        Clock: Start=1997-12-04; End=1998-04-30
        Weather: FileName=Gat34.met
        Zone paddock: Area=1; Slope=0; AspectAngle=0; Altitude=50
          MicroClimate: a_interception=0; b_interception=1; c_interception=0; d_interception=0; soil_albedo=0.3; SoilHeatFluxFraction=0; MinimumHeightDiffForNewLayer=0; NightInterceptionFraction=0; ReferenceHeight=0
          Irrigation
          Fertiliser
          SurfaceOrganicMatter: InitialResidueName=wheat; InitialResidueType=wheat; InitialResidueMass=500; InitialStandingFraction=0; InitialCPR=0; InitialCNR=40
          Report DailyReport: same as Mungbean_REMS.aps18.aps18.paddock.DailyReport
          Manager HarvestRule: same as Mungbean_REMS.aps18.aps18.paddock.HarvestRule
          Report HarvestReport: same as Replacements.HarvestReport
          Plant Soybean
          Manager Irrigatefixeddates: same as Mungbean_REMS.RCM_Katherine87.RCM_Katherine87.paddock.Irrigatefixeddates
          Operations
          Soil: Latitude=0; Longitude=0
            WaterBalance SoilWater: SummerDate=1-Nov; SummerU=6; SummerCona=3.5; WinterDate=1-Apr; WinterU=6; WinterCona=3.5; DiffusConst=88; DiffusSlope=35.4; Salb=0.13; CN2Bare=72; CNRed=20; CNCov=0.8; DischargeWidth=5; CatchmentArea=10; Thickness=[200, 200, 200, 200, 200, 200, 200, 200]; SWCON=[0.4, 0.4, 0.4, 0.4, 0.4, 0.4, 0.4, 0.4]
            CERESSoilTemperature Temperature
            Organic: FOMCNRatio=33
              Thickness  Carbon  SoilCNRatio  FBiom  FInert  FOM
              200        2.2     14.5         0.02   0.36    0
              200        1.6     14.5         0.015  0.5     0
              200        1.35    14.5         0.01   0.59    0
              200        0.95    14.5         0.01   0.84    0
              200        1       14.5         0.01   0.8     0
              200        0.8     14.5         0.01   0.99    0
              200        0.45    14.5         0.01   0.99    0
              200        0.45    14.5         0.01   0.99    0
            Chemical
              Thickness  NO3N  NH4N  PH
              200        0.14  1     7.5
              200        0.32  1     8
              200        0.3   1     8
              200        0.15  1     8
              200        0.17  1     8
              200        0.08  1     8
              200        0.08  1     8
              200        0.09  1     8
            Nutrient
            Physical
              Thickness  BD    AirDry  LL15  DUL   SAT
              150        1.37  0.05    0.18  0.41  0.43
              150        1.27  0.19    0.19  0.47  0.48
              150        1.28  0.22    0.22  0.41  0.45
              150        1.33  0.19    0.19  0.41  0.45
              300        1.37  0.22    0.22  0.37  0.45
              300        1.42  0.19    0.19  0.37  0.44
              300        1.36  0.17    0.17  0.37  0.4
              300        1.35  0.17    0.17  0.37  0.4
              SoilCrop SoybeanSoil: LL=[0.2, 0.273, 0.271, 0.273, 0.294, 0.275, 0.29, 0.306]; KL=[0.08, 0.08, 0.08, 0.08, 0.06, 0.04, 0.02, 0.01]; XF=[1, 1, 1, 1, 1, 1, 1, 1]
            Sample Initial conditions: Thickness=[150, 150, 150, 150, 300, 300, 300, 300]; SW=[0.402, 0.411, 0.402, 0.382, 0.374, 0.35, 0.322, 0.295]; SWUnits=Volumetric; OCUnits=Total; PHUnits=Water
          Manager SowingRule
            RowSpacing = 400
            SowingDepth = 50
            SowingRate = 40
            CultivarName = Emerald
            SowingDate = 12/18/1997 00:00:00
            script: same as in Mungbean_REMS.aps18.aps18.paddock.SowingRule
  Folder Mungbean_DAF
    Memo Mungbean_DAF data description
      These trials were done by DAF in 2019 and 2020, largely looking at the impact of applying N and innoculating seeds.
    Experiment ACRI
      Factors
        Permutation
          Factor N: Specification=[Operations]
            Operations 0N_Jade_rf
              2020-01-23  [Fertiliser].Apply(Amount: 0, Type: Fertiliser.Types.UreaN, Depth: 150)
              2020-01-23  [Soybean].Sow(population: 25, cultivar: "Jade", depth: 50, rowSpacing: 500)
            Operations 0N_Opal_rf
              2020-01-23  [Fertiliser].Apply(Amount: 0, Type: Fertiliser.Types.UreaN, Depth: 150)
              2020-01-23  [Soybean].Sow(population: 25, cultivar: "Opal", depth: 50, rowSpacing: 500)
            Operations 30N_Jade_rf
              2020-01-23  [Fertiliser].Apply(Amount: 30, Type: Fertiliser.Types.UreaN, Depth: 150)
              2020-01-23  [Soybean].Sow(population: 25, cultivar: "Jade", depth: 50, rowSpacing: 500)
            Operations 60N_Jade_rf
              2020-01-23  [Fertiliser].Apply(Amount: 60, Type: Fertiliser.Types.UreaN, Depth: 150)
              2020-01-23  [Soybean].Sow(population: 25, cultivar: "Jade", depth: 50, rowSpacing: 500)
            Operations 90N_Jade_rf
              2020-01-23  [Fertiliser].Apply(Amount: 90, Type: Fertiliser.Types.UreaN, Depth: 150)
              2020-01-23  [Soybean].Sow(population: 25, cultivar: "Jade", depth: 50, rowSpacing: 500)
            Operations 120N_Jade_rf
              2020-01-23  [Fertiliser].Apply(Amount: 120, Type: Fertiliser.Types.UreaN, Depth: 150)
              2020-01-23  [Soybean].Sow(population: 25, cultivar: "Jade", depth: 50, rowSpacing: 500)
            Operations 150N_Jade_rf
              2020-01-23  [Fertiliser].Apply(Amount: 150, Type: Fertiliser.Types.UreaN, Depth: 150)
              2020-01-23  [Soybean].Sow(population: 25, cultivar: "Jade", depth: 50, rowSpacing: 500)
            Operations 0N_Jade_irr
              2020-01-23  [Fertiliser].Apply(Amount: 0, Type: Fertiliser.Types.UreaN, Depth: 150)
              2020-01-23  [Soybean].Sow(population: 25, cultivar: "Jade", depth: 50, rowSpacing: 500)
              2020-03-04  [Irrigation].Apply(amount: 50)
            Operations 0N_Opal_irr
              2020-01-23  [Fertiliser].Apply(Amount: 0, Type: Fertiliser.Types.UreaN, Depth: 150)
              2020-01-23  [Soybean].Sow(population: 25, cultivar: "Opal", depth: 50, rowSpacing: 500)
              2020-03-04  [Irrigation].Apply(amount: 50)
            Operations 30N_Jade_irr
              2020-01-23  [Fertiliser].Apply(Amount: 30, Type: Fertiliser.Types.UreaN, Depth: 150)
              2020-01-23  [Soybean].Sow(population: 25, cultivar: "Jade", depth: 50, rowSpacing: 500)
              2020-03-04  [Irrigation].Apply(amount: 50)
            Operations 60N_Jade_irr
              2020-01-23  [Fertiliser].Apply(Amount: 60, Type: Fertiliser.Types.UreaN, Depth: 150)
              2020-01-23  [Soybean].Sow(population: 25, cultivar: "Jade", depth: 50, rowSpacing: 500)
              2020-03-04  [Irrigation].Apply(amount: 50)
            Operations 90N_Jade_irr
              2020-01-23  [Fertiliser].Apply(Amount: 90, Type: Fertiliser.Types.UreaN, Depth: 150)
              2020-01-23  [Soybean].Sow(population: 25, cultivar: "Jade", depth: 50, rowSpacing: 500)
              2020-03-04  [Irrigation].Apply(amount: 50)
            Operations 120N_Jade_irr
              2020-01-23  [Fertiliser].Apply(Amount: 120, Type: Fertiliser.Types.UreaN, Depth: 150)
              2020-01-23  [Soybean].Sow(population: 25, cultivar: "Jade", depth: 50, rowSpacing: 500)
              2020-03-04  [Irrigation].Apply(amount: 50)
            Operations 150N_Jade_irr
              2020-01-23  [Fertiliser].Apply(Amount: 150, Type: Fertiliser.Types.UreaN, Depth: 150)
              2020-01-23  [Soybean].Sow(population: 25, cultivar: "Jade", depth: 50, rowSpacing: 500)
              2020-03-04  [Irrigation].Apply(amount: 50)
      Simulation ACRI
        Clock: Start=2020-01-23; End=2020-05-08
        Summary summaryfile
        Weather: FileName=ACRI.xlsx; ExcelWorkSheetName=ACRI
        SoilArbitrator Soil Arbitrator
        Zone paddock: Area=1; Slope=0; AspectAngle=0; Altitude=50
          MicroClimate: a_interception=0; b_interception=1; c_interception=0; d_interception=0; soil_albedo=0.3; SoilHeatFluxFraction=0; MinimumHeightDiffForNewLayer=0; NightInterceptionFraction=0; ReferenceHeight=0
          Irrigation
          Fertiliser
          SurfaceOrganicMatter: InitialResidueName=wheat; InitialResidueType=wheat; InitialResidueMass=500; InitialStandingFraction=0; InitialCPR=0; InitialCNR=40
          Report DailyReport: same as Mungbean_REMS.aps18.aps18.paddock.DailyReport
          Manager SowingRule: same as Mungbean_REMS.RCM_Katherine87.RCM_Katherine87.paddock.SowingRule
          Manager HarvestRule: same as Mungbean_REMS.aps18.aps18.paddock.HarvestRule
          Report HarvestReport: same as Replacements.HarvestReport
          Plant Soybean
          Manager Irrigatefixeddates: same as Mungbean_REMS.RCM_Katherine87.RCM_Katherine87.paddock.Irrigatefixeddates
          Operations
          Soil: Latitude=0; Longitude=0
            WaterBalance SoilWater: SummerDate=1-Nov; SummerU=6; SummerCona=3.5; WinterDate=1-Apr; WinterU=6; WinterCona=3.5; DiffusConst=88; DiffusSlope=35.4; Salb=0.13; CN2Bare=72; CNRed=20; CNCov=0.8; DischargeWidth=5; CatchmentArea=10; Thickness=[150, 150, 300, 300, 300, 300, 300, 999999]; SWCON=[0.366, 0.366, 0.351, 0.284, 0.26, 0.22, 0.22, -]
            CERESSoilTemperature Temperature
            Organic: FOMCNRatio=33
              Thickness  Carbon  SoilCNRatio  FBiom  FInert  FOM
              150        1.94    14.5         0.02   0.36    0
              150        1.38    14.5         0.015  0.5     0
              300        1       14.5         0.01   0.59    0
              300        0.9     14.5         0.01   0.84    0
              300        0.75    14.5         0.01   0.8     0
              300        0.6     14.5         0.01   0.99    0
              300        0.45    14.5         0.01   0.99    0
            Chemical
              Thickness  NO3N  NH4N  PH
              150        36    0     8
              150        9     0     7.8
              300        7     2     7.8
              300        4     3     7.8
              300        2     2     7.8
              300        0.08  1     7.8
              300        0.08  1     7.8
            Nutrient
            Physical
              Thickness  BD    AirDry  LL15  DUL   SAT
              150        1.31  0.05    0.22  0.43  0.48
              150        1.26  0.22    0.22  0.44  0.49
              300        1.36  0.22    0.22  0.41  0.46
              300        1.39  0.22    0.22  0.4   0.45
              300        1.44  0.22    0.22  0.38  0.43
              300        1.45  0.22    0.22  0.37  0.42
              300        1.46  0.22    0.22  0.37  0.42
              SoilCrop SoybeanSoil: LL=[0.22, 0.22, 0.28, 0.34, 0.33, 0.37, 0.37]; KL=[0.08, 0.08, 0.08, 0.08, 0.08, 0.08, 0.08]; XF=[1, 1, 1, 1, 1, 1, 1]
            Sample Initial conditions: Thickness=[150, 150, 300, 300, 300, 300, 300]; SW=[0.366, 0.366, 0.351, 0.284, 0.26, 0.22, 0.22]; SWUnits=Volumetric; OCUnits=Total; PHUnits=Water
    Experiment Breeza
      Factors
        Permutation
          Factor N: Specification=[Operations]
            Operations 0N
              2019-01-23  [Fertiliser].Apply(Amount: 0, Type: Fertiliser.Types.NH4N, Depth: 150)
              2019-04-01  [Irrigation].Apply(amount: 50)
              2019-02-26  [Irrigation].Apply(amount: 50)
            Operations FallowNshallow
              2018-11-13  [Fertiliser].Apply(Amount: 120, Type: Fertiliser.Types.UreaN, Depth: 50)
              2019-04-01  [Irrigation].Apply(amount: 50)
              2019-02-26  [Irrigation].Apply(amount: 50)
            Operations FallowNdeep
              2018-11-13  [Fertiliser].Apply(Amount: 120, Type: Fertiliser.Types.UreaN, Depth: 150)
              2019-04-01  [Irrigation].Apply(amount: 50)
              2019-02-26  [Irrigation].Apply(amount: 50)
            Operations SplitN
              2018-11-13  [Fertiliser].Apply(Amount: 60, Type: Fertiliser.Types.UreaN, Depth: 50)
              2018-11-13  [Fertiliser].Apply(Amount: 60, Type: Fertiliser.Types.UreaN, Depth: 150)
              2019-04-01  [Irrigation].Apply(amount: 50)
              2019-02-26  [Irrigation].Apply(amount: 50)
            Operations PlantN
              2019-01-09  [Fertiliser].Apply(Amount: 120, Type: Fertiliser.Types.UreaN, Depth: 150)
              2019-04-01  [Irrigation].Apply(amount: 50)
              2019-02-26  [Irrigation].Apply(amount: 50)
      Simulation Breeza
        Clock: Start=2018-11-13; End=2019-06-16
        Summary summaryfile
        Weather: FileName=Breeza.xlsx; ExcelWorkSheetName=Breeza
        SoilArbitrator Soil Arbitrator
        Zone paddock: Area=1; Slope=0; AspectAngle=0; Altitude=50
          MicroClimate: a_interception=0; b_interception=1; c_interception=0; d_interception=0; soil_albedo=0.3; SoilHeatFluxFraction=0; MinimumHeightDiffForNewLayer=0; NightInterceptionFraction=0; ReferenceHeight=0
          Irrigation
          Fertiliser
          SurfaceOrganicMatter: InitialResidueName=sorghum; InitialResidueType=sorghum; InitialResidueMass=5000; InitialStandingFraction=0; InitialCPR=0; InitialCNR=70
          Report DailyReport: same as Mungbean_REMS.aps18.aps18.paddock.DailyReport
          Manager SowingRule
            SowingDate = 01/09/2019 00:00:00
            SowingRate = 25
            CultivarName = Jade
            RowSpacing = 360
            SowingDepth = 40
            script: same as in Mungbean_REMS.aps18.aps18.paddock.SowingRule
          Manager HarvestRule: same as Mungbean_REMS.aps18.aps18.paddock.HarvestRule
          Report HarvestReport: same as Replacements.HarvestReport
          Plant Soybean
          Operations
          Soil: Latitude=0; Longitude=0
            WaterBalance SoilWater: SummerDate=1-Nov; SummerU=6; SummerCona=3.5; WinterDate=1-Apr; WinterU=6; WinterCona=3.5; DiffusConst=88; DiffusSlope=35.4; Salb=0.13; CN2Bare=72; CNRed=20; CNCov=0.8; DischargeWidth=5; CatchmentArea=10; Thickness=[150, 150, 300, 300, 300, 300, 300, 999999]; SWCON=[0.526, 0.519, 0.531, 0.527, 0.52, 0.518, 0.511, -]
            CERESSoilTemperature Temperature
            Organic: FOMCNRatio=33
              Thickness  Carbon  SoilCNRatio  FBiom  FInert  FOM
              150        1.04    14.5         0.02   0.36    0
              150        0.79    14.5         0.015  0.5     0
              300        0.71    14.5         0.01   0.59    0
              300        0.52    14.5         0.01   0.84    0
              300        0.29    14.5         0.01   0.8     0
              300        0.3     14.5         0.01   0.99    0
              300        0.23    14.5         0.01   0.99    0
            Chemical: same as Mungbean_DAF.ACRI.ACRI.paddock.soil.Chemical
            Nutrient
            Physical
              Thickness  BD     AirDry  LL15   DUL    SAT
              150        1.043  0.15    0.35   0.526  0.526
              150        1.063  0.351   0.351  0.519  0.519
              300        1.03   0.354   0.354  0.531  0.531
              300        1.042  0.354   0.354  0.527  0.527
              300        1.06   0.354   0.354  0.52   0.52
              300        1.065  0.354   0.354  0.518  0.518
              300        1.084  0.354   0.354  0.511  0.511
              SoilCrop SoybeanSoil: LL=[0.4, 0.408, 0.386, 0.391, 0.471, 0.518, 0.511]; KL=[0.08, 0.08, 0.08, 0.08, 0.08, 0.08, 0.08]; XF=[1, 1, 1, 1, 1, 1, 1]
            Sample Initial conditions: Thickness=[150, 150, 300, 300, 300, 300, 300]; SW=[0.526, 0.519, 0.531, 0.527, 0.52, 0.518, 0.511]; SWUnits=Volumetric; OCUnits=Total; PHUnits=Water
    Experiment Emerald2019
      Factors
        Permutation
          Factor N: Specification=[Operations]
            Operations 0N
              2018-11-07  [Irrigation].Apply(amount: 75)
              2019-02-25  [Irrigation].Apply(amount: 75)
            Operations FallowNshallow
              2018-11-07  [Fertiliser].Apply(Amount: 100, Type: Fertiliser.Types.NH4N, Depth: 50)
              2018-11-07  [Irrigation].Apply(amount: 75)
              2019-02-25  [Irrigation].Apply(amount: 75)
            Operations FallowNdeep
              2018-11-07  [Fertiliser].Apply(Amount: 100, Type: Fertiliser.Types.NH4N, Depth: 150)
              2018-11-07  [Irrigation].Apply(amount: 75)
              2019-02-25  [Irrigation].Apply(amount: 75)
            Operations SplitN
              2018-11-07  [Fertiliser].Apply(Amount: 50, Type: Fertiliser.Types.NH4N, Depth: 50)
              2018-11-07  [Fertiliser].Apply(Amount: 50, Type: Fertiliser.Types.NH4N, Depth: 150)
              2018-11-07  [Irrigation].Apply(amount: 75)
              2019-02-25  [Irrigation].Apply(amount: 75)
            Operations PlantN
              2020-02-25  [Fertiliser].Apply(Amount: 100, Type: Fertiliser.Types.NH4N, Depth: 150)
              2018-11-07  [Irrigation].Apply(amount: 75)
              2019-02-25  [Irrigation].Apply(amount: 75)
            Operations PlantNSplit
              2020-02-25  [Fertiliser].Apply(Amount: 50, Type: Fertiliser.Types.NH4N, Depth: 150)
              2020-03-15  [Fertiliser].Apply(Amount: 50, Type: Fertiliser.Types.NH4N, Depth: 150)
              2018-11-07  [Irrigation].Apply(amount: 75)
              2019-02-25  [Irrigation].Apply(amount: 75)
      Simulation Emerald2019
        Clock: Start=2018-11-13; End=2019-08-16
        Summary summaryfile
        Weather: FileName=Emerald2009_2020.xlsx; ExcelWorkSheetName=Emerald
        SoilArbitrator Soil Arbitrator
        Zone paddock: Area=1; Slope=0; AspectAngle=0; Altitude=50
          MicroClimate: a_interception=0; b_interception=1; c_interception=0; d_interception=0; soil_albedo=0.3; SoilHeatFluxFraction=0; MinimumHeightDiffForNewLayer=0; NightInterceptionFraction=0; ReferenceHeight=0
          Irrigation
          Fertiliser
          SurfaceOrganicMatter: InitialResidueName=sorghum; InitialResidueType=sorghum; InitialResidueMass=5000; InitialStandingFraction=0; InitialCPR=0; InitialCNR=70
          Report DailyReport: same as Mungbean_REMS.aps18.aps18.paddock.DailyReport
          Manager SowingRule
            RowSpacing = 360
            SowingDepth = 40
            SowingRate = 21
            CultivarName = Jade
            SowingDate = 03/25/2019 00:00:00
            script: same as in Mungbean_REMS.aps18.aps18.paddock.SowingRule
          Manager HarvestRule: same as Mungbean_REMS.aps18.aps18.paddock.HarvestRule
          Report HarvestReport: same as Replacements.HarvestReport
          Plant Soybean
          Operations
          Soil: Latitude=0; Longitude=0
            WaterBalance SoilWater: SummerDate=1-Nov; SummerU=6; SummerCona=3.5; WinterDate=1-Apr; WinterU=6; WinterCona=3.5; DiffusConst=88; DiffusSlope=35.4; Salb=0.13; CN2Bare=72; CNRed=20; CNCov=0.8; DischargeWidth=5; CatchmentArea=10; Thickness=[150, 150, 300, 300, 300, 300, 300, 999999]; SWCON=[0.384, 0.379, 0.353, 0.365, 0.387, 0.401, 0.396, -]
            CERESSoilTemperature Temperature
            Organic: FOMCNRatio=33
              Thickness  Carbon  SoilCNRatio  FBiom  FInert  FOM
              150        1.24    14.5         0.02   0.36    0
              150        1.24    14.5         0.015  0.5     0
              300        1.25    14.5         0.01   0.59    0
              300        1.1     14.5         0.01   0.84    0
              300        0.71    14.5         0.01   0.8     0
              300        0.34    14.5         0.01   0.99    0
              300        0.34    14.5         0.01   0.99    0
            Chemical: same as Mungbean_DAF.ACRI.ACRI.paddock.soil.Chemical
            Nutrient
            Physical
              Thickness  BD     AirDry  LL15   DUL    SAT
              150        1.422  0.05    0.124  0.384  0.463
              150        1.431  0.148   0.148  0.379  0.46
              300        1.46   0.153   0.153  0.353  0.449
              300        1.44   0.153   0.153  0.365  0.449
              300        1.416  0.153   0.153  0.387  0.449
              300        1.394  0.153   0.153  0.401  0.449
              300        1.407  0.153   0.153  0.396  0.449
              SoilCrop SoybeanSoil: LL=[0.124, 0.148, 0.153, 0.153, 0.153, 0.153, 0.153]; KL=[0.08, 0.08, 0.08, 0.08, 0.08, 0.08, 0.08]; XF=[1, 1, 1, 1, 1, 1, 1]
            Sample Initial conditions: Thickness=[150, 150, 300, 300, 300, 300, 300]; SW=[0.384, 0.379, 0.353, 0.365, 0.387, 0.401, 0.396]; SWUnits=Volumetric; OCUnits=Total; PHUnits=Water
    Experiment Emerald2020
      Factors
        Permutation
          Factor N: Specification=[Operations]
            Operations 0N_rf
              2019-12-16  [Irrigation].Apply(amount: 100)
            Operations 0N_doubstarter_rf
              2019-12-16  [Irrigation].Apply(amount: 100)
              2020-02-17  [Fertiliser].Apply(Amount: 0, Type: Fertiliser.Types.UreaN, Depth: 150)
            Operations 30N_rf
              2019-12-16  [Irrigation].Apply(amount: 100)
              2019-11-25  [Fertiliser].Apply(Amount: 30, Type: Fertiliser.Types.UreaN, Depth: 150)
            Operations 60N_rf
              2019-12-16  [Irrigation].Apply(amount: 100)
              2019-11-25  [Fertiliser].Apply(Amount: 60, Type: Fertiliser.Types.UreaN, Depth: 150)
            Operations 90N_rf
              2019-12-16  [Irrigation].Apply(amount: 100)
              2019-11-25  [Fertiliser].Apply(Amount: 90, Type: Fertiliser.Types.UreaN, Depth: 150)
            Operations 120N_rf
              2019-12-16  [Irrigation].Apply(amount: 100)
              2019-11-25  [Fertiliser].Apply(Amount: 120, Type: Fertiliser.Types.UreaN, Depth: 150)
            Operations 150N_rf
              2019-12-16  [Irrigation].Apply(amount: 100)
              2019-11-25  [Fertiliser].Apply(Amount: 150, Type: Fertiliser.Types.UreaN, Depth: 150)
            Operations 0N_irr
              2019-12-16  [Irrigation].Apply(amount: 100)
              2020-02-17  [Fertiliser].Apply(Amount: 0, Type: Fertiliser.Types.UreaN, Depth: 150)
            Operations 0N_doubstarter_irr
              2019-12-16  [Irrigation].Apply(amount: 100)
              2020-02-17  [Fertiliser].Apply(Amount: 0, Type: Fertiliser.Types.UreaN, Depth: 150)
            Operations 30N_irr
              2019-12-16  [Irrigation].Apply(amount: 100)
              2019-11-25  [Fertiliser].Apply(Amount: 30, Type: Fertiliser.Types.UreaN, Depth: 150)
            Operations 60N_irr
              2019-12-16  [Irrigation].Apply(amount: 100)
              2019-11-25  [Fertiliser].Apply(Amount: 60, Type: Fertiliser.Types.UreaN, Depth: 150)
            Operations 90N_irr
              2019-12-16  [Irrigation].Apply(amount: 100)
              2019-11-25  [Fertiliser].Apply(Amount: 90, Type: Fertiliser.Types.UreaN, Depth: 150)
            Operations 120N_irr
              2019-12-16  [Irrigation].Apply(amount: 100)
              2019-11-25  [Fertiliser].Apply(Amount: 120, Type: Fertiliser.Types.UreaN, Depth: 150)
            Operations 150N_irr
              2019-12-16  [Irrigation].Apply(amount: 100)
              2019-11-25  [Fertiliser].Apply(Amount: 150, Type: Fertiliser.Types.UreaN, Depth: 150)
      Simulation Emerald2020
        Clock: Start=2020-01-01; End=2020-06-16
        Summary summaryfile
        Weather: FileName=Emerald2009_2020.xlsx; ExcelWorkSheetName=Emerald
        SoilArbitrator Soil Arbitrator
        Zone paddock: Area=1; Slope=0; AspectAngle=0; Altitude=50
          MicroClimate: a_interception=0; b_interception=1; c_interception=0; d_interception=0; soil_albedo=0.3; SoilHeatFluxFraction=0; MinimumHeightDiffForNewLayer=0; NightInterceptionFraction=0; ReferenceHeight=0
          Irrigation
          Fertiliser
          SurfaceOrganicMatter: InitialResidueName=wheat; InitialResidueType=wheat; InitialResidueMass=500; InitialStandingFraction=0; InitialCPR=0; InitialCNR=40
          Report DailyReport: same as Mungbean_REMS.aps18.aps18.paddock.DailyReport
          Manager SowingRule
            SowingDate = 02/17/2020 00:00:00
            SowingRate = 30
            CultivarName = Jade
            RowSpacing = 360
            SowingDepth = 40
            script: same as in Mungbean_REMS.aps18.aps18.paddock.SowingRule
          Manager HarvestRule: same as Mungbean_REMS.aps18.aps18.paddock.HarvestRule
          Report HarvestReport: same as Replacements.HarvestReport
          Plant Soybean
          Operations
          Soil: Latitude=0; Longitude=0
            WaterBalance SoilWater: same as Mungbean_DAF.Emerald2019.Emerald2019.paddock.soil.SoilWater
            CERESSoilTemperature Temperature
            Organic: same as Mungbean_DAF.Emerald2019.Emerald2019.paddock.soil.Organic
            Chemical: same as Mungbean_DAF.ACRI.ACRI.paddock.soil.Chemical
            Nutrient
            Physical: same as Mungbean_DAF.Emerald2019.Emerald2019.paddock.soil.Physical
            Sample Initial conditions: same as Mungbean_DAF.Emerald2019.Emerald2019.paddock.soil.Initial conditions
            InitialWater Initial water: PercentMethod=0; FractionFull=1
    Experiment HopelandSpring
      Factors
        Permutation
          Factor N: Specification=[Operations]
            Operations 0N_rf
              2019-12-16  [Irrigation].Apply(amount: 100)
              2019-10-14  [Fertiliser].Apply(Amount: 3.6, Type: Fertiliser.Types.UreaN, Depth: 150)
            Operations 0N_doubstarter_rf
              2019-10-14  [Irrigation].Apply(amount: 100)
              2019-10-14  [Fertiliser].Apply(Amount: 7.2, Type: Fertiliser.Types.UreaN, Depth: 150)
            Operations 30N_rf
              2019-10-14  [Fertiliser].Apply(Amount: 30, Type: Fertiliser.Types.UreaN, Depth: 150)
              2019-10-14  [Irrigation].Apply(amount: 100)
              2019-10-14  [Fertiliser].Apply(Amount: 3.6, Type: Fertiliser.Types.UreaN, Depth: 150)
            Operations 60N_rf
              2019-10-14  [Fertiliser].Apply(Amount: 60, Type: Fertiliser.Types.UreaN, Depth: 150)
              2019-10-14  [Irrigation].Apply(amount: 100)
              2019-10-14  [Fertiliser].Apply(Amount: 3.6, Type: Fertiliser.Types.UreaN, Depth: 150)
            Operations 90N_rf
              2019-10-14  [Fertiliser].Apply(Amount: 90, Type: Fertiliser.Types.UreaN, Depth: 150)
              2019-10-14  [Irrigation].Apply(amount: 100)
              2019-10-14  [Fertiliser].Apply(Amount: 3.6, Type: Fertiliser.Types.UreaN, Depth: 150)
            Operations 120N_rf
              2019-10-14  [Fertiliser].Apply(Amount: 120, Type: Fertiliser.Types.UreaN, Depth: 150)
              2019-10-14  [Irrigation].Apply(amount: 100)
              2019-10-14  [Fertiliser].Apply(Amount: 3.6, Type: Fertiliser.Types.UreaN, Depth: 150)
            Operations 150N_rf
              2019-10-14  [Fertiliser].Apply(Amount: 150, Type: Fertiliser.Types.UreaN, Depth: 150)
              2019-10-14  [Irrigation].Apply(amount: 100)
              2019-10-14  [Fertiliser].Apply(Amount: 3.6, Type: Fertiliser.Types.UreaN, Depth: 150)
            Operations 0N_irr
              2019-10-14  [Fertiliser].Apply(Amount: 0, Type: Fertiliser.Types.UreaN, Depth: 150)
              2019-11-20  [Irrigation].Apply(amount: 100)
              2019-12-11  [Irrigation].Apply(amount: 100)
              2019-12-12  [Irrigation].Apply(amount: 100)
              2019-10-14  [Fertiliser].Apply(Amount: 3.6, Type: Fertiliser.Types.UreaN, Depth: 150)
            Operations 0N_doubstarter_irr
              2019-10-14  [Fertiliser].Apply(Amount: 0, Type: Fertiliser.Types.UreaN, Depth: 150)
              2019-11-20  [Irrigation].Apply(amount: 100)
              2019-12-11  [Irrigation].Apply(amount: 100)
              2019-12-12  [Irrigation].Apply(amount: 100)
              2019-10-14  [Fertiliser].Apply(Amount: 7.2, Type: Fertiliser.Types.UreaN, Depth: 150)
            Operations 30N_irr
              2019-10-14  [Fertiliser].Apply(Amount: 30, Type: Fertiliser.Types.UreaN, Depth: 150)
              2019-11-20  [Irrigation].Apply(amount: 100)
              2019-12-11  [Irrigation].Apply(amount: 100)
              2019-12-12  [Irrigation].Apply(amount: 100)
              2019-10-14  [Fertiliser].Apply(Amount: 3.6, Type: Fertiliser.Types.UreaN, Depth: 150)
            Operations 60N_irr
              2019-10-14  [Fertiliser].Apply(Amount: 60, Type: Fertiliser.Types.UreaN, Depth: 150)
              2019-11-20  [Irrigation].Apply(amount: 100)
              2019-12-11  [Irrigation].Apply(amount: 100)
              2019-12-12  [Irrigation].Apply(amount: 100)
              2019-10-14  [Fertiliser].Apply(Amount: 3.6, Type: Fertiliser.Types.UreaN, Depth: 150)
            Operations 90N_irr
              2019-10-14  [Fertiliser].Apply(Amount: 90, Type: Fertiliser.Types.UreaN, Depth: 150)
              2019-11-20  [Irrigation].Apply(amount: 100)
              2019-12-11  [Irrigation].Apply(amount: 100)
              2019-12-12  [Irrigation].Apply(amount: 100)
              2019-10-14  [Fertiliser].Apply(Amount: 3.6, Type: Fertiliser.Types.UreaN, Depth: 150)
            Operations 120N_irr
              2019-10-14  [Fertiliser].Apply(Amount: 120, Type: Fertiliser.Types.UreaN, Depth: 150)
              2019-11-20  [Irrigation].Apply(amount: 100)
              2019-12-11  [Irrigation].Apply(amount: 100)
              2019-12-12  [Irrigation].Apply(amount: 100)
              2019-10-14  [Fertiliser].Apply(Amount: 3.6, Type: Fertiliser.Types.UreaN, Depth: 150)
            Operations 150N_irr
              2019-10-14  [Fertiliser].Apply(Amount: 150, Type: Fertiliser.Types.UreaN, Depth: 150)
              2019-11-20  [Irrigation].Apply(amount: 100)
              2019-12-11  [Irrigation].Apply(amount: 100)
              2019-12-12  [Irrigation].Apply(amount: 100)
              2019-10-14  [Fertiliser].Apply(Amount: 3.6, Type: Fertiliser.Types.UreaN, Depth: 150)
      Simulation HopelandSpring
        Clock: Start=2019-10-14; End=2020-01-28
        Summary summaryfile
        Weather: FileName=Hopeland.xlsx; ExcelWorkSheetName=Hopeland
        SoilArbitrator Soil Arbitrator
        Zone paddock: Area=1; Slope=0; AspectAngle=0; Altitude=50
          MicroClimate: a_interception=0; b_interception=1; c_interception=0; d_interception=0; soil_albedo=0.3; SoilHeatFluxFraction=0; MinimumHeightDiffForNewLayer=0; NightInterceptionFraction=0; ReferenceHeight=0
          Irrigation
          Fertiliser
          SurfaceOrganicMatter: InitialResidueName=wheat; InitialResidueType=wheat; InitialResidueMass=500; InitialStandingFraction=0; InitialCPR=0; InitialCNR=40
          Report DailyReport: same as Mungbean_REMS.aps18.aps18.paddock.DailyReport
          Manager SowingRule
            RowSpacing = 500
            SowingDepth = 40
            SowingRate = 30
            CultivarName = Jade
            SowingDate = 10/14/2019 00:00:00
            script: same as in Mungbean_REMS.aps18.aps18.paddock.SowingRule
          Manager HarvestRule: same as Mungbean_REMS.aps18.aps18.paddock.HarvestRule
          Report HarvestReport: same as Replacements.HarvestReport
          Plant Soybean
          Operations
          Soil: Latitude=0; Longitude=0
            WaterBalance SoilWater: SummerDate=1-Nov; SummerU=6; SummerCona=3.5; WinterDate=1-Apr; WinterU=6; WinterCona=3.5; DiffusConst=88; DiffusSlope=35.4; Salb=0.13; CN2Bare=72; CNRed=20; CNCov=0.8; DischargeWidth=5; CatchmentArea=10; Thickness=[300, 300, 300, 300, -, -, -, 999999]; SWCON=[0.308729, 0.322907, 0.32296, 0.297662, -, -, -, -]
            CERESSoilTemperature Temperature
            Organic: FOMCNRatio=33
              Thickness  Carbon  SoilCNRatio  FBiom  FInert  FOM
              100        1.94    14.5         0.02   0.36    0
              200        1.94    14.5         0.02   0.36    0
              300        1.38    14.5         0.015  0.5     0
              300        1       14.5         0.01   0.59    0
              300        0.9     14.5         0.01   0.84    0
            Chemical
              Thickness  NO3N  NH4N  PH
              100        36    0     8
              200        36    0     8
              300        9     0     7.8
              300        7     2     7.8
              300        4     3     7.8
            Nutrient
            Physical
              Thickness  BD    AirDry  LL15  DUL       SAT
              100        1.45  0.05    0.2   0.308729  0.4
              200        1.45  0.05    0.2   0.309     0.4
              300        1.45  0.19    0.19  0.32296   0.4
              300        1.45  0.24    0.24  0.323     0.37
              300        1.45  0.27    0.27  0.298     0.35
              SoilCrop SoybeanSoil: LL=[0.2, 0.2, 0.19, 0.24, 0.27]; KL=[0.08, 0.08, 0.08, 0.08, 0.08]; XF=[1, 1, 1, 1, 1]
            Sample Initial conditions: Thickness=[100, 200, 300, 300, 300]; SW=[0.309, 0.309, 0.323, 0.323, 0.298]; SWUnits=Volumetric; OCUnits=Total; PHUnits=Water
            InitialWater Initial water: PercentMethod=0; FractionFull=1
    Experiment HopelandSummer
      Factors
        Permutation
          Factor N: Specification=[Operations]
            Operations 0N_rf
              2020-01-29  [Fertiliser].Apply(Amount: 3.6, Type: Fertiliser.Types.NO3N, Depth: 150)
            Operations 0N_doubstarter_rf
              2020-01-29  [Fertiliser].Apply(Amount: 3.6, Type: Fertiliser.Types.NO3N, Depth: 150)
            Operations 30N_rf
              2020-01-08  [Fertiliser].Apply(Amount: 30, Type: Fertiliser.Types.UreaN, Depth: 150)
              2020-01-29  [Fertiliser].Apply(Amount: 3.6, Type: Fertiliser.Types.NO3N, Depth: 150)
            Operations 60N_rf
              2020-01-08  [Fertiliser].Apply(Amount: 60, Type: Fertiliser.Types.UreaN, Depth: 150)
              2020-01-29  [Fertiliser].Apply(Amount: 3.6, Type: Fertiliser.Types.NO3N, Depth: 150)
            Operations 90N_rf
              2020-01-08  [Fertiliser].Apply(Amount: 90, Type: Fertiliser.Types.UreaN, Depth: 150)
              2020-01-29  [Fertiliser].Apply(Amount: 3.6, Type: Fertiliser.Types.NO3N, Depth: 150)
            Operations 120N_rf
              2020-01-08  [Fertiliser].Apply(Amount: 120, Type: Fertiliser.Types.UreaN, Depth: 150)
              2020-01-29  [Fertiliser].Apply(Amount: 3.6, Type: Fertiliser.Types.NO3N, Depth: 150)
            Operations 150N_rf
              2020-01-08  [Fertiliser].Apply(Amount: 150, Type: Fertiliser.Types.UreaN, Depth: 150)
              2020-01-29  [Fertiliser].Apply(Amount: 3.6, Type: Fertiliser.Types.NO3N, Depth: 150)
            Operations 0N_irr
              2020-03-20  [Irrigation].Apply(amount: 100)
              2020-01-29  [Fertiliser].Apply(Amount: 3.6, Type: Fertiliser.Types.NO3N, Depth: 150)
            Operations 0N_doubstarter_irr
              2020-03-20  [Irrigation].Apply(amount: 100)
              2020-01-29  [Fertiliser].Apply(Amount: 7.2, Type: Fertiliser.Types.NO3N, Depth: 150)
            Operations 30N_irr
              2020-01-08  [Fertiliser].Apply(Amount: 30, Type: Fertiliser.Types.UreaN, Depth: 150)
              2020-03-20  [Irrigation].Apply(amount: 100)
              2020-01-29  [Fertiliser].Apply(Amount: 3.6, Type: Fertiliser.Types.NO3N, Depth: 150)
            Operations 60N_irr
              2020-01-08  [Fertiliser].Apply(Amount: 60, Type: Fertiliser.Types.UreaN, Depth: 150)
              2020-03-20  [Irrigation].Apply(amount: 100)
              2020-01-29  [Fertiliser].Apply(Amount: 3.6, Type: Fertiliser.Types.NO3N, Depth: 150)
            Operations 90N_irr
              2020-01-08  [Fertiliser].Apply(Amount: 90, Type: Fertiliser.Types.UreaN, Depth: 150)
              2020-03-20  [Irrigation].Apply(amount: 100)
              2020-01-29  [Fertiliser].Apply(Amount: 3.6, Type: Fertiliser.Types.NO3N, Depth: 150)
            Operations 120N_irr
              2020-01-08  [Fertiliser].Apply(Amount: 120, Type: Fertiliser.Types.UreaN, Depth: 150)
              2020-03-20  [Irrigation].Apply(amount: 100)
              2020-01-29  [Fertiliser].Apply(Amount: 3.6, Type: Fertiliser.Types.NO3N, Depth: 150)
            Operations 150N_irr
              2020-01-08  [Fertiliser].Apply(Amount: 150, Type: Fertiliser.Types.UreaN, Depth: 150)
              2020-03-20  [Irrigation].Apply(amount: 100)
              2020-01-29  [Fertiliser].Apply(Amount: 3.6, Type: Fertiliser.Types.NO3N, Depth: 150)
      Simulation HopelandSummer
        Clock: Start=2020-01-08; End=2020-04-18
        Summary summaryfile
        Weather: FileName=Hopeland.xlsx; ExcelWorkSheetName=Hopeland
        SoilArbitrator Soil Arbitrator
        Zone paddock: Area=1; Slope=0; AspectAngle=0; Altitude=50
          MicroClimate: a_interception=0; b_interception=1; c_interception=0; d_interception=0; soil_albedo=0.3; SoilHeatFluxFraction=0; MinimumHeightDiffForNewLayer=0; NightInterceptionFraction=0; ReferenceHeight=0
          Irrigation
          Fertiliser
          SurfaceOrganicMatter: InitialResidueName=wheat; InitialResidueType=wheat; InitialResidueMass=500; InitialStandingFraction=0; InitialCPR=0; InitialCNR=40
          Report DailyReport: same as Mungbean_REMS.aps18.aps18.paddock.DailyReport
          Manager SowingRule
            RowSpacing = 500
            SowingDepth = 40
            SowingRate = 30
            CultivarName = Jade
            SowingDate = 01/29/2020 00:00:00
            script: same as in Mungbean_REMS.aps18.aps18.paddock.SowingRule
          Manager HarvestRule: same as Mungbean_REMS.aps18.aps18.paddock.HarvestRule
          Report HarvestReport: same as Replacements.HarvestReport
          Plant Soybean
          Operations
          Soil: same as Mungbean_DAF.HopelandSpring.HopelandSpring.paddock.soil
    Experiment Irvingdale
      Factors
        Permutation
          Factor N: Specification=[Operations]
            Operations 0N
              2018-12-12  [Fertiliser].Apply(Amount: 0, Type: Fertiliser.Types.NH4N, Depth: 150)
              2019-01-09  [Irrigation].Apply(amount: 80)
              2019-02-08  [Irrigation].Apply(amount: 80)
              2018-12-28  [Fertiliser].Apply(Amount: 3.6, Type: Fertiliser.Types.NO3N, Depth: 150)
            Operations FallowNshallow
              2018-12-12  [Fertiliser].Apply(Amount: 100, Type: Fertiliser.Types.NH4N, Depth: 50)
              2019-01-09  [Irrigation].Apply(amount: 80)
              2019-02-08  [Irrigation].Apply(amount: 80)
              2018-12-28  [Fertiliser].Apply(Amount: 3.6, Type: Fertiliser.Types.NO3N, Depth: 150)
            Operations FallowNdeep
              2019-12-12  [Fertiliser].Apply(Amount: 100, Type: Fertiliser.Types.NH4N, Depth: 150)
              2019-01-09  [Irrigation].Apply(amount: 80)
              2019-02-08  [Irrigation].Apply(amount: 80)
              2018-12-28  [Fertiliser].Apply(Amount: 3.6, Type: Fertiliser.Types.NO3N, Depth: 150)
            Operations SplitN
              2019-12-12  [Fertiliser].Apply(Amount: 100, Type: Fertiliser.Types.NH4N, Depth: 50)
              2018-12-28  [Fertiliser].Apply(Amount: 100, Type: Fertiliser.Types.NH4N, Depth: 150)
              2019-01-09  [Irrigation].Apply(amount: 80)
              2019-02-08  [Irrigation].Apply(amount: 80)
              2018-12-28  [Fertiliser].Apply(Amount: 3.6, Type: Fertiliser.Types.NO3N, Depth: 150)
            Operations PlantN
              2018-12-28  [Fertiliser].Apply(Amount: 100, Type: Fertiliser.Types.NH4N, Depth: 150)
              2019-01-09  [Irrigation].Apply(amount: 80)
              2019-02-08  [Irrigation].Apply(amount: 80)
              2018-12-28  [Fertiliser].Apply(Amount: 3.6, Type: Fertiliser.Types.NO3N, Depth: 150)
      Simulation Irvingdale
        Clock: Start=2018-12-12; End=2019-04-08
        Summary summaryfile
        Weather: FileName=Irvingdale.xlsx; ExcelWorkSheetName=Irvingdale
        SoilArbitrator Soil Arbitrator
        Zone paddock: Area=1; Slope=0; AspectAngle=0; Altitude=50
          MicroClimate: a_interception=0; b_interception=1; c_interception=0; d_interception=0; soil_albedo=0.3; SoilHeatFluxFraction=0; MinimumHeightDiffForNewLayer=0; NightInterceptionFraction=0; ReferenceHeight=0
          Irrigation
          Fertiliser
          SurfaceOrganicMatter: InitialResidueName=wheat; InitialResidueType=wheat; InitialResidueMass=500; InitialStandingFraction=0; InitialCPR=0; InitialCNR=40
          Report DailyReport: same as Mungbean_REMS.aps18.aps18.paddock.DailyReport
          Manager SowingRule
            RowSpacing = 500
            SowingDepth = 40
            SowingRate = 30
            CultivarName = Jade
            SowingDate = 12/28/2018 00:00:00
            script: same as in Mungbean_REMS.aps18.aps18.paddock.SowingRule
          Manager HarvestRule: same as Mungbean_REMS.aps18.aps18.paddock.HarvestRule
          Report HarvestReport: same as Replacements.HarvestReport
          Plant Soybean
          Operations
          Soil: Latitude=0; Longitude=0
            WaterBalance SoilWater: SummerDate=1-Nov; SummerU=6; SummerCona=3.5; WinterDate=1-Apr; WinterU=6; WinterCona=3.5; DiffusConst=88; DiffusSlope=35.4; Salb=0.13; CN2Bare=72; CNRed=20; CNCov=0.8; DischargeWidth=5; CatchmentArea=10; Thickness=[100, 200, 300, 300, 300, -, -, -]; SWCON=[0.372, 0.372, 0.464, 0.392, 0.328, -, -, -]
            CERESSoilTemperature Temperature
            Organic: FOMCNRatio=33
              Thickness  Carbon  SoilCNRatio  FBiom  FInert  FOM
              100        1.94    14.5         0.02   0.36    0
              200        1.38    14.5         0.015  0.5     0
              300        1       14.5         0.01   0.59    0
              300        0.9     14.5         0.01   0.84    0
              300        0.75    14.5         0.01   0.8     0
            Chemical
              Thickness  NO3N  NH4N  PH
              100        18    10    5.6
              200        13    7     6.5
              300        6     5     7
              300        1     5     7
              300        3     6     7
            Nutrient
            Physical
              Thickness  BD    AirDry  LL15  DUL         SAT
              100        1.36  0.05    0.25  0.372       0.48
              200        1.36  0.25    0.25  0.372343    0.48
              300        1.36  0.25    0.25  0.464073    0.48
              300        1.36  0.27    0.27  0.392124    0.45
              300        1.36  0.3     0.3   0.32771596  0.43
              SoilCrop SoybeanSoil: LL=[0.25, 0.25, 0.25, 0.27, 0.3]; KL=[0.08, 0.08, 0.08, 0.08, 0.08]; XF=[1, 1, 1, 1, 1]
            Sample Initial conditions: Thickness=[100, 200, 300, 300, 300]; SW=[0.372, 0.372, 0.464, 0.392, 0.328]; SWUnits=Volumetric; OCUnits=Total; PHUnits=Water
  Folder Mungbean_RCN_2009
    Memo Mungbean_RCN2009 data description
      These trials were done by DAF with RCN in 2009 looking at row spacing at 4 different sites, irrigated and rainfed.
    Experiment Emerald2009
      Factors
        Permutation
          Factor Sow: Specification=[Operations]
            CompositeFactor Wide_rf
              Specifications:
                [SowingRule].Script.SowingRate=30
                [SowingRule].Script.RowSpacing=1000
              Operations irr
                2009-02-08  [Irrigation].Apply(amount: 25)
            CompositeFactor Narrow_rf
              Specifications:
                [SowingRule].Script.SowingRate=30
                [SowingRule].Script.RowSpacing=500
              Operations irr
                2009-02-08  [Irrigation].Apply(amount: 25)
            CompositeFactor Wide_
              Specifications:
                [SowingRule].Script.SowingRate=30
                [SowingRule].Script.RowSpacing=1000
              Operations irr
                2009-02-08  [Irrigation].Apply(amount: 25)
                2009-04-02  [Irrigation].Apply(amount: 100)
            CompositeFactor Narrow_
              Specifications:
                [SowingRule].Script.SowingRate=30
                [SowingRule].Script.RowSpacing=500
              Operations irr
                2009-02-08  [Irrigation].Apply(amount: 25)
                2009-04-02  [Irrigation].Apply(amount: 100)
      Simulation Emerald2009
        Clock: Start=2009-01-01; End=2010-12-31
        Summary summaryfile
        Weather: FileName=Emerald2009_2020.xlsx; ExcelWorkSheetName=Emerald
        SoilArbitrator Soil Arbitrator
        Zone paddock: Area=1; Slope=0; AspectAngle=0; Altitude=50
          MicroClimate: a_interception=0; b_interception=1; c_interception=0; d_interception=0; soil_albedo=0.3; SoilHeatFluxFraction=0; MinimumHeightDiffForNewLayer=0; NightInterceptionFraction=0; ReferenceHeight=0
          Irrigation
          Fertiliser
          SurfaceOrganicMatter: InitialResidueName=wheat; InitialResidueType=wheat; InitialResidueMass=500; InitialStandingFraction=0; InitialCPR=0; InitialCNR=40
          Report DailyReport: same as Mungbean_REMS.aps18.aps18.paddock.DailyReport
          Manager SowingRule
            RowSpacing = 360
            SowingDepth = 40
            SowingRate = 35
            CultivarName = King
            SowingDate = 03/31/1980 00:00:00
            script: same as in Mungbean_REMS.aps18.aps18.paddock.SowingRule
          Manager HarvestRule: same as Mungbean_REMS.aps18.aps18.paddock.HarvestRule
          Report HarvestReport: same as Replacements.HarvestReport
          Plant Soybean
          Manager Irrigatefixeddates: same as Mungbean_REMS.RCM_Katherine87.RCM_Katherine87.paddock.Irrigatefixeddates
          Operations
          Soil: same as Mungbean_DAF.Emerald2020.Emerald2020.paddock.soil
    Experiment Hermitage2009
      Factors
        Permutation
          Factor Sow
            CompositeFactor Wide
              Specifications:
                [SowingRule].Script.SowingRate=30
                [SowingRule].Script.RowSpacing=1000
            CompositeFactor Narrow
              Specifications:
                [SowingRule].Script.SowingRate=30
                [SowingRule].Script.RowSpacing=500
      Simulation Hermitage2009
        Clock: Start=2018-11-13; End=2019-06-16
        Summary summaryfile
        Weather: FileName=Hermitage.xlsx; ExcelWorkSheetName=Hermitage
        SoilArbitrator Soil Arbitrator
        Zone paddock: Area=1; Slope=0; AspectAngle=0; Altitude=50
          MicroClimate: a_interception=0; b_interception=1; c_interception=0; d_interception=0; soil_albedo=0.3; SoilHeatFluxFraction=0; MinimumHeightDiffForNewLayer=0; NightInterceptionFraction=0; ReferenceHeight=0
          Irrigation
          Fertiliser
          SurfaceOrganicMatter: InitialResidueName=sorghum; InitialResidueType=sorghum; InitialResidueMass=5000; InitialStandingFraction=0; InitialCPR=0; InitialCNR=70
          Report DailyReport: same as Mungbean_REMS.aps18.aps18.paddock.DailyReport
          Manager SowingRule
            RowSpacing = 360
            SowingDepth = 40
            SowingRate = 25
            CultivarName = Jade
            SowingDate = 01/09/2019 00:00:00
            script: same as in Mungbean_REMS.aps18.aps18.paddock.SowingRule
          Manager HarvestRule: same as Mungbean_REMS.aps18.aps18.paddock.HarvestRule
          Report HarvestReport: same as Replacements.HarvestReport
          Plant Soybean
          Operations
          Soil Brown Vertosol-Talgai-shallow phase (Hermitage No033): ASCOrder=Vertosol; ASCSubOrder=Brown; SoilType=Clay; Site=Hermitage; NearestTown=Warwick, Q 4370; Region=Darling Downs and Granite Belt; State=Queensland; Country=Australia; NaturalVegetation=Poplar Box , Ironbark, Qld Blue Gum; ApsoilNumber=33; Latitude=-28.2; Longitude=152.101; LocationAccuracy=+/- 20m; YearOfSampling=0; Comments=Clay - oc and ph estimated
            DataSource=Data provided by I.  Broad, Queensland Department of Primary Industries
            Physical
              Thickness  BD    AirDry  LL15  DUL   SAT
              150        1.38  0.115   0.23  0.4   0.45
              150        1.38  0.184   0.23  0.4   0.45
              300        1.3   0.23    0.23  0.43  0.48
              300        1.37  0.23    0.23  0.4   0.45
              300        1.49  0.23    0.23  0.36  0.41
              300        1.64  0.23    0.23  0.3   0.35
              300        1.6   0.23    0.23  0.32  0.37
              BD, DUL source: Field measured and checked for sensibility
              AirDry, LL15 source: Estimated based on local knowledge
              SAT source: Calculated from measured, estimated or calculated BD
              SoilCrop SoybeanSoil: LL=[0.4, 0.4, 0.386, 0.391, 0.36, 0.3, 0.32]; KL=[0.08, 0.08, 0.08, 0.08, 0.08, 0.08, 0.08]; XF=[1, 1, 1, 1, 1, 1, 1]
            WaterBalance SoilWater: SummerDate=1-Nov; SummerU=6; SummerCona=3.5; WinterDate=1-Apr; WinterU=4; WinterCona=2.5; DiffusConst=40; DiffusSlope=16; Salb=0.12; CN2Bare=73; CNRed=20; CNCov=0.8; Thickness=[150, 150, 300, 300, 300, 300, 300]; SWCON=[0.3, 0.3, 0.3, 0.3, 0.3, 0.3, 0.3]
            Organic: FOMCNRatio=40
              Thickness  Carbon  SoilCNRatio  FBiom  FInert  FOM
              150        1.24    12           0.04   0.4     347.129
              150        1.24    12           0.02   0.6     270.344
              300        1.25    12           0.02   0.8     163.972
              300        1.1     12           0.02   1       99.4541
              300        0.71    12           0.01   1       60.322
              300        0.34    12           0.01   1       36.5871
              300        0.26    12           0.01   1       22.1912
            Chemical: Thickness=[150, 150, 300, 300, 300, 300, 300]; PH=[8, 8, 8, 8, 8, 8, 8]
              PH source: Estimated based on local knowledge
            InitialWater Initial water: PercentMethod=0; FractionFull=1
            Sample Initial conditions: Depth=[0-180]; Thickness=[1800]; NH4=[1]; SWUnits=Volumetric; OCUnits=Total; PHUnits=Water
            Nutrient
            CERESSoilTemperature Temperature
    Experiment Biloela2009
      Factors
        Permutation
          Factor Sow
            CompositeFactor Wide_rf
              Specifications:
                [SowingRule].Script.SowingRate=30
                [SowingRule].Script.RowSpacing=1000
            CompositeFactor Narrow_rf
              Specifications:
                [SowingRule].Script.SowingRate=30
                [SowingRule].Script.RowSpacing=500
            CompositeFactor Wide_
              Specifications:
                [SowingRule].Script.SowingRate=30
                [SowingRule].Script.RowSpacing=1000
              Operations irr
                2010-03-19  [Irrigation].Apply(amount: 50)
            CompositeFactor Narrow_
              Specifications:
                [SowingRule].Script.SowingRate=30
                [SowingRule].Script.RowSpacing=500
              Operations irr
                2010-03-19  [Irrigation].Apply(amount: 50)
      Simulation Biloela2009
        Clock: Start=2020-01-01; End=2020-06-16
        Summary summaryfile
        Weather: FileName=Biloela.xlsx; ExcelWorkSheetName=Irvingdale
        SoilArbitrator Soil Arbitrator
        Zone paddock: Area=1; Slope=0; AspectAngle=0; Altitude=50
          MicroClimate: a_interception=0; b_interception=1; c_interception=0; d_interception=0; soil_albedo=0.3; SoilHeatFluxFraction=0; MinimumHeightDiffForNewLayer=0; NightInterceptionFraction=0; ReferenceHeight=0
          Irrigation
          Fertiliser
          SurfaceOrganicMatter: InitialResidueName=wheat; InitialResidueType=wheat; InitialResidueMass=500; InitialStandingFraction=0; InitialCPR=0; InitialCNR=40
          Report DailyReport: same as Mungbean_REMS.aps18.aps18.paddock.DailyReport
          Manager SowingRule
            RowSpacing = 360
            SowingDepth = 40
            SowingRate = 30
            CultivarName = Jade
            SowingDate = 02/17/2020 00:00:00
            script: same as in Mungbean_REMS.aps18.aps18.paddock.SowingRule
          Manager HarvestRule: same as Mungbean_REMS.aps18.aps18.paddock.HarvestRule
          Report HarvestReport: same as Replacements.HarvestReport
          Plant Soybean
          Operations
          Soil Black Vertosol-Radel (Jambin No050): ASCOrder=Vertosol; ASCSubOrder=Black; SoilType=Clay; Site=Jambin; NearestTown=Jambin, Q 4702; Region=Capricornia; State=Queensland; Country=Australia; NaturalVegetation=Brigalow; ApsoilNumber=50; Latitude=-24.17; Longitude=150.368; LocationAccuracy=+/- 20m; YearOfSampling=0; DataSource=Qld Department of Primary Industries and Fisheries (D Lack); Comments=Clay -
            Physical
              Thickness  BD    AirDry  LL15  DUL   SAT
              150        1.22  0.13    0.26  0.46  0.51
              150        1.28  0.208   0.26  0.44  0.49
              300        1.28  0.29    0.29  0.44  0.49
              300        1.29  0.29    0.29  0.42  0.47
              300        1.33  0.29    0.29  0.42  0.47
              300        1.34  0.29    0.29  0.41  0.46
              BD, DUL source: Field measured and checked for sensibility
              AirDry, LL15 source: Estimated based on local knowledge
              SAT source: Calculated from measured, estimated or calculated BD
              SoilCrop SoybeanSoil: LL=[0.26, 0.26, 0.29, 0.29, 0.29, 0.29]; KL=[0.08, 0.08, 0.08, 0.08, 0.06, 0.04]; XF=[1, 1, 1, 1, 1, 1]
            WaterBalance SoilWater: SummerDate=1-Nov; SummerU=6; SummerCona=3.5; WinterDate=1-Apr; WinterU=4; WinterCona=2.5; DiffusConst=40; DiffusSlope=16; Salb=0.12; CN2Bare=73; CNRed=20; CNCov=0.8; Thickness=[150, 150, 300, 300, 300, 300]; SWCON=[0.3, 0.3, 0.3, 0.3, 0.3, 0.3]
            Organic: FOMCNRatio=40
              Thickness  Carbon  SoilCNRatio  FBiom  FInert  FOM
              150        1.19    12           0.04   0.4     390.598
              150        1.01    12           0.02   0.6     289.362
              300        0.45    12           0.02   0.8     158.805
              300        0.3     12           0.02   1       87.1541
              300        0.2     12           0.01   1       47.8312
              300        0.16    12           0.01   1       26.2503
            Chemical: Thickness=[150, 150, 300, 300, 300, 300]; PH=[8.2, 8.5, 8.6, 8.6, 7.4, 5.3]
              PH source: Estimated based on local knowledge
            InitialWater Initial water: PercentMethod=0; FractionFull=1
            Sample Initial conditions: Depth=[0-180]; Thickness=[1800]; NH4=[1]; SWUnits=Volumetric; OCUnits=Total; PHUnits=Water
            Nutrient
            CERESSoilTemperature Temperature
    Experiment Kingaroy2009
      Factors
        Permutation
          Factor Sow
            CompositeFactor Wide
              Specifications:
                [SowingRule].Script.SowingRate=30
                [SowingRule].Script.RowSpacing=900
            CompositeFactor Narrow
              Specifications:
                [SowingRule].Script.SowingRate=30
                [SowingRule].Script.RowSpacing=300
      Simulation Kingaroy2009
        Clock: Start=2010-01-01; End=2010-06-30
        Summary summaryfile
        Weather: FileName=Kingaroy.xlsx; ExcelWorkSheetName=Irvingdale
        SoilArbitrator Soil Arbitrator
        Zone paddock: Area=1; Slope=0; AspectAngle=0; Altitude=50
          MicroClimate: a_interception=0; b_interception=1; c_interception=0; d_interception=0; soil_albedo=0.3; SoilHeatFluxFraction=0; MinimumHeightDiffForNewLayer=0; NightInterceptionFraction=0; ReferenceHeight=0
          Irrigation
          Fertiliser
          SurfaceOrganicMatter: InitialResidueName=sorghum; InitialResidueType=sorghum; InitialResidueMass=5000; InitialStandingFraction=0; InitialCPR=0; InitialCNR=70
          Report DailyReport: same as Mungbean_REMS.aps18.aps18.paddock.DailyReport
          Manager SowingRule
            RowSpacing = 360
            SowingDepth = 40
            SowingRate = 21
            CultivarName = Crystal
            SowingDate = 01/19/2010 00:00:00
            script: same as in Mungbean_REMS.aps18.aps18.paddock.SowingRule
          Manager HarvestRule: same as Mungbean_REMS.aps18.aps18.paddock.HarvestRule
          Report HarvestReport: same as Replacements.HarvestReport
          Plant Soybean
          Operations
          Soil: Latitude=0; Longitude=0
            WaterBalance SoilWater: SummerDate=1-Nov; SummerU=6; SummerCona=3.5; WinterDate=1-Apr; WinterU=6; WinterCona=3.5; DiffusConst=88; DiffusSlope=35.4; Salb=0.13; CN2Bare=72; CNRed=20; CNCov=0.8; DischargeWidth=5; CatchmentArea=10; Thickness=[100, 100, 300, 300, 300, 300, 500, 999999]; SWCON=[0.37, 0.37, 0.36, 0.37, 0.38, 0.4, 0.39, -]
            CERESSoilTemperature Temperature
            Organic: FOMCNRatio=33
              Thickness  Carbon  SoilCNRatio  FBiom  FInert  FOM
              100        1.19    14.5         0.02   0.36    0
              100        1.01    14.5         0.015  0.5     0
              300        0.45    14.5         0.01   0.59    0
              300        0.3     14.5         0.01   0.84    0
              300        0.2     14.5         0.01   0.8     0
              300        0.16    14.5         0.01   0.99    0
              500        0.16    14.5         0.01   0.99    0
            Chemical
              Thickness  NO3N  NH4N  PH
              100        36    0     8
              100        9     0     7.8
              300        7     2     7.8
              300        4     3     7.8
              300        2     2     7.8
              300        0.08  1     7.8
              500        0.08  1     7.8
            Nutrient
            Physical
              Thickness  BD    AirDry  LL15  DUL   SAT
              100        1.2   0.15    0.26  0.37  0.463
              100        1.23  0.26    0.26  0.37  0.46
              300        1.27  0.26    0.26  0.36  0.449
              300        1.32  0.29    0.29  0.37  0.449
              300        1.39  0.3     0.3   0.38  0.449
              300        1.45  0.37    0.37  0.4   0.449
              500        1.48  0.37    0.37  0.39  0.442
              SoilCrop SoybeanSoil: LL=[0.26, 0.26, 0.26, 0.29, 0.3, 0.37, 0.37]; KL=[0.08, 0.08, 0.08, 0.08, 0.08, 0.08, 0.08]; XF=[1, 1, 1, 1, 1, 1, 1]
            Sample Initial conditions: Thickness=[100, 100, 300, 300, 300, 300, 500]; SW=[0.37, 0.37, 0.36, 0.37, 0.38, 0.4, 0.39]; SWUnits=Volumetric; OCUnits=Total; PHUnits=Water
  Folder Mungbean_RCN_2016
    Memo Mungbean_RCN2015 data description
      These trials were done by DAF with RCN in 2009 looking at row spacing at 4 different sites, irrigated and rainfed. The key data from this is soil water extraction.
    Experiment Emerald2016
      Factors
        Permutation
          Factor Sow: Specification=[Operations]
            CompositeFactor Wide_rf: Specifications=[SowingRule].Script.RowSpacing=1000
              Operations _
                2016-01-13  [SowingRule].Script.Sow()
                2017-01-18  [SowingRule].Script.Sow()
            CompositeFactor Medium_rf: Specifications=[SowingRule].Script.RowSpacing=500
              Operations _
                2016-01-13  [SowingRule].Script.Sow()
                2017-01-18  [SowingRule].Script.Sow()
            CompositeFactor Narrow_rf
              Specifications:
                [SowingRule].Script.RowSpacing=250
                [SowingRule].Script.SowingDate=2016-01-13
                [SowingRule].Script.SowingDate=2017-01-18
              Operations _
                2016-01-13  [SowingRule].Script.Sow()
                2017-01-18  [SowingRule].Script.Sow()
            CompositeFactor Wide_: Specifications=[SowingRule].Script.RowSpacing=1000
              Operations irr
                2016-01-20  [Irrigation].Apply(amount: 30)
                2016-02-01  [Irrigation].Apply(amount: 30)
                2016-02-15  [Irrigation].Apply(amount: 30)
                2016-03-01  [Irrigation].Apply(amount: 30)
                2016-03-15  [Irrigation].Apply(amount: 30)
                2017-01-25  [Irrigation].Apply(amount: 10)
                2017-02-01  [Irrigation].Apply(amount: 20)
                2017-02-15  [Irrigation].Apply(amount: 20)
                2017-03-01  [Irrigation].Apply(amount: 20)
                2017-03-15  [Irrigation].Apply(amount: 20)
                2016-01-13  [SowingRule].Script.Sow()
                2017-01-18  [SowingRule].Script.Sow()
            CompositeFactor Medium_
              Specifications:
                [SowingRule].Script.RowSpacing=500
                [SowingRule].Script.SowingDate=2016-01-13
                [SowingRule].Script.SowingDate=2017-01-18
              Operations irr: same as Mungbean_RCN_2016.Emerald2016.Factors.Permutation.Sow.Wide_.irr
            CompositeFactor Narrow_
              Specifications:
                [SowingRule].Script.RowSpacing=250
                [SowingRule].Script.SowingDate=2016-01-13
                [SowingRule].Script.SowingDate=2017-01-18
              Operations irr: same as Mungbean_RCN_2016.Emerald2016.Factors.Permutation.Sow.Wide_.irr
            CompositeFactor SW1_Irr_Narrow: Specifications=[SowingRule].Script.RowSpacing=250
              Operations irr
                2016-01-20  [Irrigation].Apply(amount: 30)
                2016-02-01  [Irrigation].Apply(amount: 30)
                2016-02-15  [Irrigation].Apply(amount: 30)
                2016-03-01  [Irrigation].Apply(amount: 30)
                2016-03-15  [Irrigation].Apply(amount: 30)
                2017-01-25  [Irrigation].Apply(amount: 20)
                2017-02-01  [Irrigation].Apply(amount: 20)
                2017-02-15  [Irrigation].Apply(amount: 20)
                2017-03-01  [Irrigation].Apply(amount: 20)
                2017-03-15  [Irrigation].Apply(amount: 20)
                2015-12-18  [SowingRule].Script.Sow()
                2016-12-08  [SowingRule].Script.Sow()
            CompositeFactor SW2_Irr_Narrow: Specifications=[SowingRule].Script.RowSpacing=250
              Operations irr
                2016-01-20  [Irrigation].Apply(amount: 30)
                2016-02-01  [Irrigation].Apply(amount: 30)
                2016-02-15  [Irrigation].Apply(amount: 30)
                2016-03-01  [Irrigation].Apply(amount: 30)
                2016-03-15  [Irrigation].Apply(amount: 30)
                2017-01-25  [Irrigation].Apply(amount: 20)
                2017-02-01  [Irrigation].Apply(amount: 20)
                2017-02-15  [Irrigation].Apply(amount: 20)
                2017-03-01  [Irrigation].Apply(amount: 20)
                2017-03-15  [Irrigation].Apply(amount: 10)
                2015-01-13  [SowingRule].Script.Sow()
                2016-01-18  [SowingRule].Script.Sow()
            CompositeFactor SW3_Irr_Narrow: Specifications=[SowingRule].Script.RowSpacing=250
              Operations irr
                2016-02-20  [Irrigation].Apply(amount: 30)
                2016-03-01  [Irrigation].Apply(amount: 30)
                2016-03-15  [Irrigation].Apply(amount: 30)
                2016-03-20  [Irrigation].Apply(amount: 30)
                2016-04-01  [Irrigation].Apply(amount: 30)
                2017-02-25  [Irrigation].Apply(amount: 20)
                2017-03-25  [Irrigation].Apply(amount: 20)
                2017-04-25  [Irrigation].Apply(amount: 20)
                2015-02-18  [SowingRule].Script.Sow()
                2016-03-02  [SowingRule].Script.Sow()
            CompositeFactor SW1_Irr_Med: Specifications=[SowingRule].Script.RowSpacing=500
              Operations irr: same as Mungbean_RCN_2016.Emerald2016.Factors.Permutation.Sow.SW1_Irr_Narrow.irr
            CompositeFactor SW2_Irr_Med: Specifications=[SowingRule].Script.RowSpacing=500
              Operations irr: same as Mungbean_RCN_2016.Emerald2016.Factors.Permutation.Sow.SW2_Irr_Narrow.irr
            CompositeFactor SW3_Irr_Med: Specifications=[SowingRule].Script.RowSpacing=500
              Operations irr: same as Mungbean_RCN_2016.Emerald2016.Factors.Permutation.Sow.SW3_Irr_Narrow.irr
            CompositeFactor SW1_Irr_Wide: Specifications=[SowingRule].Script.RowSpacing=1000
              Operations irr: same as Mungbean_RCN_2016.Emerald2016.Factors.Permutation.Sow.SW1_Irr_Narrow.irr
            CompositeFactor SW2_Irr_Wide: Specifications=[SowingRule].Script.RowSpacing=1000
              Operations irr: same as Mungbean_RCN_2016.Emerald2016.Factors.Permutation.Sow.SW2_Irr_Narrow.irr
            CompositeFactor SW3_Irr_Wide: Specifications=[SowingRule].Script.RowSpacing=1000
              Operations irr: same as Mungbean_RCN_2016.Emerald2016.Factors.Permutation.Sow.SW3_Irr_Narrow.irr
            CompositeFactor SW1_rf_Narrow: Specifications=[SowingRule].Script.RowSpacing=250
              Operations irr
                2015-12-18  [SowingRule].Script.Sow()
                2016-12-08  [SowingRule].Script.Sow()
            CompositeFactor SW2_rf_Narrow: Specifications=[SowingRule].Script.RowSpacing=250
              Operations irr
                2015-01-13  [SowingRule].Script.Sow()
                2016-01-18  [SowingRule].Script.Sow()
            CompositeFactor SW3_rf_Narrow: Specifications=[SowingRule].Script.RowSpacing=250
              Operations irr
                2015-02-18  [SowingRule].Script.Sow()
                2016-03-02  [SowingRule].Script.Sow()
            CompositeFactor SW1_rf_Med: Specifications=[SowingRule].Script.RowSpacing=500
              Operations irr
                2015-12-18  [SowingRule].Script.Sow()
                2016-12-08  [SowingRule].Script.Sow()
            CompositeFactor SW2_rf_Med: Specifications=[SowingRule].Script.RowSpacing=500
              Operations irr
                2015-01-13  [SowingRule].Script.Sow()
                2016-01-18  [SowingRule].Script.Sow()
            CompositeFactor SW3_rf_Med: Specifications=[SowingRule].Script.RowSpacing=500
              Operations irr
                2015-02-18  [SowingRule].Script.Sow()
                2016-03-02  [SowingRule].Script.Sow()
            CompositeFactor SW1_rf_Wide: Specifications=[SowingRule].Script.RowSpacing=1000
              Operations irr
                2015-12-18  [SowingRule].Script.Sow()
                2016-12-08  [SowingRule].Script.Sow()
            CompositeFactor SW2_rf_Wide: Specifications=[SowingRule].Script.RowSpacing=1000
              Operations irr
                2015-01-13  [SowingRule].Script.Sow()
                2016-01-18  [SowingRule].Script.Sow()
            CompositeFactor SW3_rf_Wide: Specifications=[SowingRule].Script.RowSpacing=1000
              Operations irr
                2015-02-18  [SowingRule].Script.Sow()
                2016-03-02  [SowingRule].Script.Sow()
      Simulation Emerald2016
        Clock: Start=2016-01-01; End=2017-12-31
        Summary summaryfile
        Weather: FileName=Emerald2009_2020.xlsx; ExcelWorkSheetName=Emerald
        SoilArbitrator Soil Arbitrator
        Zone paddock: Area=1; Slope=0; AspectAngle=0; Altitude=50
          MicroClimate: a_interception=0; b_interception=1; c_interception=0; d_interception=0; soil_albedo=0.3; SoilHeatFluxFraction=0; MinimumHeightDiffForNewLayer=0; NightInterceptionFraction=0; ReferenceHeight=0
          Irrigation
          Fertiliser
          SurfaceOrganicMatter: InitialResidueName=wheat; InitialResidueType=wheat; InitialResidueMass=500; InitialStandingFraction=0; InitialCPR=0; InitialCNR=40
          Report DailyReport: same as Mungbean_REMS.aps18.aps18.paddock.DailyReport
          Manager SowingRule
            RowSpacing = 360
            SowingDepth = 40
            SowingRate = 30
            CultivarName = Jade
            SowingDate = 03/31/1980 00:00:00
```csharp
using APSIM.Shared.Utilities;
using Models.PMF;
using Models.Core;
using System;
        
        namespace Models
        {
           [Serializable] 
           [System.Xml.Serialization.XmlInclude(typeof(Model))]
            public class Script : Model
            {      
               [Link] Plant Soybean;
               [Link] Clock Clock;

               [Description("Spacing (mm) between rows")]
               public double RowSpacing { get; set; }
               [Description("Depth (mm) Grains are planted")]
               public double SowingDepth { get; set; }
               [Description("Seeds sown (/m2)")]
               public double SowingRate { get; set; }
               [Description("Cultivar")]
               [Display(Type=DisplayType.CultivarName)]
               public string CultivarName { get; set; }
               [Description("Sowing Date")]
               public DateTime SowingDate { get; set; }

               [EventSubscribe("DoManagement")]
               private void OnDoManagement(object sender, EventArgs e)
               {
                if (Clock.Today.Date == SowingDate)
                	Sow();
           
                    
               }
               public void Sow()
               {Soybean.Sow(population:SowingRate, cultivar:CultivarName, depth:SowingDepth, rowSpacing:RowSpacing, budNumber:1);
               }
            }
        }
```
          Manager HarvestRule: same as Mungbean_REMS.aps18.aps18.paddock.HarvestRule
          Report HarvestReport: same as Replacements.HarvestReport
          Plant Soybean
          Manager Irrigatefixeddates: same as Mungbean_REMS.RCM_Katherine87.RCM_Katherine87.paddock.Irrigatefixeddates
          Operations
          Soil: same as Mungbean_DAF.Emerald2020.Emerald2020.paddock.soil
    Experiment Hermitage2016
      Factors
        Permutation
          Factor Sow: Specification=[Operations]
            CompositeFactor Wide_rf
              Specifications:
                [SowingRule].Script.RowSpacing=1000
                [SowingRule].Script.SowingDate=2015-12-08
                [SowingRule].Script.SowingDate=2017-01-06
            CompositeFactor Medium_rf
              Specifications:
                [SowingRule].Script.RowSpacing=500
                [SowingRule].Script.SowingDate=2015-12-08
                [SowingRule].Script.SowingDate=2017-01-06
            CompositeFactor Narrow_rf
              Specifications:
                [SowingRule].Script.RowSpacing=250
                [SowingRule].Script.SowingDate=2015-12-08
                [SowingRule].Script.SowingDate=2017-01-06
            CompositeFactor Wide_
              Specifications:
                [SowingRule].Script.RowSpacing=1000
                [SowingRule].Script.SowingDate=2015-12-08
                [SowingRule].Script.SowingDate=2017-01-06
              Operations irr
                2017-01-10  [Irrigation].Apply(amount: 15)
                2017-01-25  [Irrigation].Apply(amount: 15)
                2017-02-05  [Irrigation].Apply(amount: 18)
                2017-02-20  [Irrigation].Apply(amount: 15)
            CompositeFactor Medium_
              Specifications:
                [SowingRule].Script.RowSpacing=500
                [SowingRule].Script.SowingDate=2015-12-08
                [SowingRule].Script.SowingDate=2017-01-06
              Operations irr: same as Mungbean_RCN_2016.Hermitage2016.Factors.Permutation.Sow.Wide_.irr
            CompositeFactor Narrow_
              Specifications:
                [SowingRule].Script.RowSpacing=250
                [SowingRule].Script.SowingDate=2015-12-08
                [SowingRule].Script.SowingDate=2017-01-06
              Operations irr: same as Mungbean_RCN_2016.Hermitage2016.Factors.Permutation.Sow.Wide_.irr
      Simulation Hermitage2016
        Clock: Start=2017-01-01; End=2018-03-05
        Summary summaryfile
        Weather: FileName=Hermitage.xlsx; ExcelWorkSheetName=Hermitage
        SoilArbitrator Soil Arbitrator
        Zone paddock: Area=1; Slope=0; AspectAngle=0; Altitude=50
          MicroClimate: a_interception=0; b_interception=1; c_interception=0; d_interception=0; soil_albedo=0.3; SoilHeatFluxFraction=0; MinimumHeightDiffForNewLayer=0; NightInterceptionFraction=0; ReferenceHeight=0
          Irrigation
          Fertiliser
          SurfaceOrganicMatter: InitialResidueName=sorghum; InitialResidueType=sorghum; InitialResidueMass=5000; InitialStandingFraction=0; InitialCPR=0; InitialCNR=70
          Report DailyReport: same as Mungbean_REMS.aps18.aps18.paddock.DailyReport
          Manager SowingRule
            RowSpacing = 500
            SowingDepth = 40
            SowingRate = 30
            CultivarName = Jade
            SowingDate = 01/09/2019 00:00:00
            script: same as in Mungbean_REMS.aps18.aps18.paddock.SowingRule
          Manager HarvestRule: same as Mungbean_REMS.aps18.aps18.paddock.HarvestRule
          Report HarvestReport: same as Replacements.HarvestReport
          Plant Soybean
          Operations
          Soil Brown Vertosol-Talgai-shallow phase (Hermitage No033): ASCOrder=Vertosol; ASCSubOrder=Brown; SoilType=Clay; Site=Hermitage; NearestTown=Warwick, Q 4370; Region=Darling Downs and Granite Belt; State=Queensland; Country=Australia; NaturalVegetation=Poplar Box , Ironbark, Qld Blue Gum; ApsoilNumber=33; Latitude=-28.2; Longitude=152.101; LocationAccuracy=+/- 20m; YearOfSampling=0; Comments=Clay - oc and ph estimated
            DataSource=Data provided by I.  Broad, Queensland Department of Primary Industries
            Physical
              Thickness  BD    AirDry  LL15  DUL   SAT
              150        1.38  0.115   0.23  0.4   0.45
              150        1.38  0.184   0.23  0.4   0.45
              300        1.3   0.23    0.23  0.43  0.48
              300        1.37  0.23    0.23  0.4   0.45
              300        1.49  0.23    0.23  0.36  0.36
              300        1.64  0.23    0.23  0.3   0.3
              300        1.6   0.23    0.23  0.32  0.32
              BD, DUL source: Field measured and checked for sensibility
              AirDry, LL15 source: Estimated based on local knowledge
              SAT source: Calculated from measured, estimated or calculated BD
              SoilCrop SoybeanSoil: LL=[0.4, 0.4, 0.386, 0.391, 0.36, 0.3, 0.32]; KL=[0.08, 0.08, 0.08, 0.08, 0.08, 0.08, 0.08]; XF=[1, 1, 1, 1, 1, 1, 1]
            WaterBalance SoilWater: same as Mungbean_RCN_2009.Hermitage2009.Hermitage2009.paddock.Brown Vertosol-Talgai-shallow phase (Hermitage No033).SoilWater
            Organic: same as Mungbean_RCN_2009.Hermitage2009.Hermitage2009.paddock.Brown Vertosol-Talgai-shallow phase (Hermitage No033).Organic
            Chemical: same as Mungbean_RCN_2009.Hermitage2009.Hermitage2009.paddock.Brown Vertosol-Talgai-shallow phase (Hermitage No033).Chemical
            InitialWater Initial water: PercentMethod=0; FractionFull=1
            Sample Initial conditions: Depth=[0-180]; Thickness=[1800]; NH4=[1]; SWUnits=Volumetric; OCUnits=Total; PHUnits=Water
            Nutrient
            CERESSoilTemperature Temperature
  Folder Yield_Gap
    Memo Mungbean_DAF data description
      CSIRO large-scale, primarily single year field studies that were looking to see what the leading yield limiters were.
    Experiment Billa_Billa
      Factors
        Permutation
          Factor Sow
            CompositeFactor 2015
              Specifications:
                [SowingRule].Script.SowingRate=30
                [SowingRule].Script.SowingDate=2015-01-13
            CompositeFactor 2016
              Specifications:
                [SowingRule].Script.SowingRate=25
                [SowingRule].Script.SowingDate=2016-01-15
            CompositeFactor 2016_17
              Specifications:
                [SowingRule].Script.SowingRate=43
                [SowingRule].Script.SowingDate=2016-12-23
      Simulation Billa_Billa
        Clock: Start=2015-01-13; End=2017-07-12
        Summary summaryfile
        Weather: FileName=Yield Gap Study\2.ClimateFiles\Glenaradale 41395.met
        SoilArbitrator Soil Arbitrator
        Zone paddock: Area=1; Slope=0; AspectAngle=0; Altitude=50
          MicroClimate: a_interception=0; b_interception=1; c_interception=0; d_interception=0; soil_albedo=0.3; SoilHeatFluxFraction=0; MinimumHeightDiffForNewLayer=0; NightInterceptionFraction=0; ReferenceHeight=0
          Irrigation
          Fertiliser
          SurfaceOrganicMatter: InitialResidueName=fababeab; InitialResidueType=fababean; InitialResidueMass=2000; InitialStandingFraction=0; InitialCPR=0; InitialCNR=30
          Report DailyReport: same as Mungbean_REMS.aps18.aps18.paddock.DailyReport
          Manager SowingRule
            SowingDate = 01/13/2015 00:00:00
            SowingRate = 30
            CultivarName = Emerald
            RowSpacing = 250
            SowingDepth = 30
            script: same as in Mungbean_REMS.aps18.aps18.paddock.SowingRule
          Manager HarvestRule: same as Mungbean_REMS.aps18.aps18.paddock.HarvestRule
          Report HarvestReport: same as Replacements.HarvestReport
          Plant Soybean
          Manager Irrigatefixeddates: same as Mungbean_REMS.RCM_Katherine87.RCM_Katherine87.paddock.Irrigatefixeddates
          Operations
          Soil Grey Vertosol (Billa Billa No220): ASCOrder=Vertosol; ASCSubOrder=Grey; SoilType=Clay; Site=Billa Billa; NearestTown=Goondiwindi; Region=Darling Downs and Granite Belt; State=Queensland; Country=Australia; NaturalVegetation=Brigalow scrub; ApsoilNumber=220; Latitude=-28.101; Longitude=150.328; LocationAccuracy=+/- 20m; YearOfSampling=0
            DataSource=Undertaken by Jeremy Whish, CSIRO Sustainable Ecosystems, Toowoomba in collaboration with MCA, Goondiwindi as part of GRDC Best Management Practice-Pulses project
            Comments=Calculated from a pond and tent during GRDC Best Management Practice-Pulses project. CLL for chickpea needs to be confirmed at depth, OC from soil (Billa Billa No. 036)
            Physical
              Thickness  BD     AirDry  LL15  DUL    SAT
              100        1.48   0.095   0.19  0.36   0.412
              200        1.5    0.152   0.19  0.35   0.404
              300        1.459  0.2     0.2   0.37   0.42
              300        1.514  0.2     0.2   0.349  0.399
              300        1.6    0.2     0.2   0.31   0.366
              300        1.72   0.2     0.2   0.27   0.321
              300        1.74   0.2     0.2   0.26   0.313
              BD source: Calculated from gravimetric moisture when profile wet but drained
              AirDry, LL15 source: Estimated based on local knowledge
              DUL source: Field measured and checked for sensibility
              SAT source: Calculated from measured, estimated or calculated BD
              SoilCrop SoybeanSoil: LL=[0.19, 0.19, 0.2, 0.281, 0.288, 0.27, 0.26]; KL=[0.06, 0.06, 0.06, 0.04, 0.04, 0.02, 0.02]; XF=[1, 1, 1, 1, 1, 1, 1]
            WaterBalance SoilWater: SummerDate=1-Nov; SummerU=6; SummerCona=3.5; WinterDate=1-Apr; WinterU=4; WinterCona=2.5; DiffusConst=40; DiffusSlope=16; Salb=0.13; CN2Bare=73; CNRed=20; CNCov=0.8; Thickness=[150, 150, 300, 300, 300, 300, 300]; SWCON=[0.3, 0.3, 0.3, 0.3, 0.3, 0.3, 0.3]
            Organic: FOMCNRatio=40
              Thickness  Carbon  SoilCNRatio  FBiom  FInert  FOM
              150        1.24    12           0.04   0.4     347.129
              150        1.24    12           0.02   0.5     270.344
              300        1.25    12           0.02   0.5     163.972
              300        1.1     12           0.02   0.6     99.4541
              300        0.71    12           0.01   0.6     60.322
              300        0.34    12           0.01   0.7     36.5871
              300        0.26    12           0.01   0.8     22.1912
            Chemical
              Thickness  NO3N     NH4N  PH   CL    EC
              150        22.4625  0     7.7  10.1  0.2
              150        13.3333  0     8.2  9.5   0.2
              300        9.13868  0     8.4  10.7  0.6
              300        8.80669  0     8.2  12.5  1.5
              300        1        0.2   7.8  12.5  1
              300        1        0.2   6.9  11.7  0.8
              300        1        0.2   6.9  11.7  0.8
              EC, CL, PH source: Measured
            InitialWater: PercentMethod=0; FractionFull=0.47; RelativeTo=LL15
            Sample Initial conditions: Depth=[0-180]; Thickness=[1800]; NH4=[1]; SWUnits=Volumetric; OCUnits=Total; PHUnits=Water
            Nutrient
            CERESSoilTemperature Temperature
    Experiment Emerald
      Factors
        Permutation
          Factor Sow
            CompositeFactor 2015_16S1: Specifications=[SowingRule].Script.SowingDate=2015-12-18
              Operations reset
                2015-12-18  [InitialWaterReset].Script.ResetWater(0,17)
            CompositeFactor 2015_16S2: Specifications=[SowingRule].Script.SowingDate=2016-01-13
              Operations reset
                2016-01-13  [InitialWaterReset].Script.ResetWater(0,36)
            CompositeFactor 2015_16S3: Specifications=[SowingRule].Script.SowingDate=2016-02-18
              Operations reset
                2016-02-18  [InitialWaterReset].Script.ResetWater(0,36)
            CompositeFactor 2016_17S1: Specifications=[SowingRule].Script.SowingDate=2016-12-08
              Operations reset
                2016-12-08  [InitialWaterReset].Script.ResetWater(0,33)
            CompositeFactor 2016_17S2: Specifications=[SowingRule].Script.SowingDate=2017-01-18
              Operations reset
                2016-02-18  [InitialWaterReset].Script.ResetWater(0,62)
            CompositeFactor 2016_17S3: Specifications=[SowingRule].Script.SowingDate=2017-03-02
              Operations reset
                2016-02-18  [InitialWaterReset].Script.ResetWater(0,28)
      Simulation EmeraldYieldGap
        Clock: Start=2015-12-18; End=2017-08-10
        Summary summaryfile
        Weather: FileName=Yield Gap Study\2.ClimateFiles\Glenaradale 41395.met
        SoilArbitrator Soil Arbitrator
        Zone paddock: Area=1; Slope=0; AspectAngle=0; Altitude=50
          MicroClimate: a_interception=0; b_interception=1; c_interception=0; d_interception=0; soil_albedo=0.3; SoilHeatFluxFraction=0; MinimumHeightDiffForNewLayer=0; NightInterceptionFraction=0; ReferenceHeight=0
          Irrigation
          Fertiliser
          SurfaceOrganicMatter: InitialResidueName=fababean; InitialResidueType=fababean; InitialResidueMass=2000; InitialStandingFraction=0; InitialCPR=0; InitialCNR=30
          Report DailyReport: same as Mungbean_REMS.aps18.aps18.paddock.DailyReport
          Manager SowingRule: same as Yield_Gap.Billa_Billa.Billa_Billa.paddock.SowingRule
          Manager HarvestRule: same as Mungbean_REMS.aps18.aps18.paddock.HarvestRule
          Report HarvestReport: same as Replacements.HarvestReport
          Plant Soybean
          Manager Irrigatefixeddates: same as Mungbean_REMS.RCM_Katherine87.RCM_Katherine87.paddock.Irrigatefixeddates
          Operations
          Manager InitialWaterReset
```csharp
using System;
using Models.Core;
using Models.Interfaces;
using Models.Soils;
using APSIM.Shared.Utilities;

namespace Models
{
    [Serializable]
    public class Script : Model
    {
        [Link] private ISummary summary;
        [Link] private IPhysical physical;
        [Link] private ISoilWater soilWater;

        public void ResetWater(int layer, double percentFull)
        {
        	if (percentFull < 0 || percentFull > 100)
        		throw new ArgumentException("percentFull must be in range [0, 100]");
        	if (layer >= physical.Thickness.Length || layer < 0)
        		throw new ArgumentException("layer must be in range [0, " + physical.Thickness.Length + "]");
        	soilWater.SW[layer] = MathUtilities.Divide(percentFull, 100, 0) * physical.PAWC[layer] + physical.LL15[layer];
        	soilWater.SWmm[layer] = MathUtilities.Divide(percentFull, 100, 0) * physical.PAWCmm[layer] + physical.LL15mm[layer];
        }
    }
}
```
          Soil Black Vertosol (Emerald No911): ASCOrder=Vertosol; ASCSubOrder=Black; SoilType=Clay; Site=Emerald; NearestTown=Emerald; Region=Central Highlands; State=Queensland; Country=Australia; ApsoilNumber=911; Latitude=-23.5211; Longitude=148.123; YearOfSampling=0; DataSource=Collected by Brett Cocks (CES) for NVT.
            Physical
              Thickness  BD     AirDry  LL15   DUL    SAT
              100        1.422  0.062   0.124  0.384  0.434
              200        1.431  0.118   0.148  0.379  0.429
              300        1.46   0.153   0.153  0.353  0.403
              300        1.44   0.153   0.153  0.365  0.415
              300        1.416  0.153   0.153  0.387  0.437
              300        1.394  0.153   0.153  0.401  0.451
              300        1.407  0.153   0.153  0.396  0.446
              BD, DUL source: Field measured and checked for sensibility
              SoilCrop SoybeanSoil: LL=[0.124, 0.148, 0.153, 0.265, 0.336, 0.401, 0.396]; KL=[0.06, 0.06, 0.06, 0.04, 0.04, 0.02, 0.02]; XF=[1, 1, 1, 1, 1, 1, 1]
            WaterBalance SoilWater: SummerDate=1-Nov; SummerU=6; SummerCona=3.5; WinterDate=1-Apr; WinterU=2; WinterCona=2; DiffusConst=40; DiffusSlope=16; Salb=0.12; CN2Bare=73; CNRed=20; CNCov=0.8; Thickness=[150, 150, 300, 300, 300, 300, 300]; SWCON=[0.3, 0.3, 0.3, 0.3, 0.3, 0.3, 0.3]
            Organic: FOMCNRatio=40
              Thickness  Carbon  SoilCNRatio  FBiom  FInert  FOM
              150        1.24    12           0.04   0.4     347.129
              150        1.24    12           0.02   0.5     270.344
              300        1.25    12           0.02   0.7     163.972
              300        1.1     12           0.02   1       99.4541
              300        0.71    12           0.01   1       60.322
              300        0.34    12           0.01   1       36.5871
              300        0.34    12           0.01   1       22.1912
            Chemical
              Thickness  NO3N     NH4N  PH   CL     EC
              150        23.4117  0     7.7  30     0.2
              150        13.9762  0     8.3  40.3   0.3
              300        9.13242  0     8.5  26     0.5
              300        9.25926  0     8.6  138.2  0.8
              300        1        0.2   8.2  485.4  1
              300        1        0.2   7.6  818.4  1.3
              300        1        0.2   7.7  947.2  1.3
            InitialWater: PercentMethod=0; FractionFull=0.36; RelativeTo=LL15
            Sample Initial conditions: Depth=[0-180]; Thickness=[1800]; NH4=[1]; SWUnits=Volumetric; OCUnits=Total; PHUnits=Water
            CERESSoilTemperature Temperature
            Nutrient
    Experiment HRS
      Factors
        Permutation
          Factor Sow
            CompositeFactor 2015_16S1: Specifications=[SowingRule].Script.SowingDate=2016-02-10
              Operations reset
                2016-02-10  [InitialWaterReset].Script.ResetWater(0,49)
            CompositeFactor 2015_16S2: Specifications=[SowingRule].Script.SowingDate=2016-01-14
              Operations reset
                2016-01-14  [InitialWaterReset].Script.ResetWater(0,14)
            CompositeFactor 2015_16S3: Specifications=[SowingRule].Script.SowingDate=2015-12-08
              Operations reset
                2015-12-08  [InitialWaterReset].Script.ResetWater(0,11)
            CompositeFactor 2016_17: Specifications=[SowingRule].Script.SowingDate=2017-1-06
              Operations reset
                2017-01-06  [InitialWaterReset].Script.ResetWater(0,33)
      Simulation HRS
        Clock: Start=2015-12-08; End=2017-06-06
        Summary summaryfile
        Weather: FileName=Hermitage.xlsx; ExcelWorkSheetName=Hermitage
        SoilArbitrator Soil Arbitrator
        Zone paddock: Area=1; Slope=0; AspectAngle=0; Altitude=50
          MicroClimate: a_interception=0; b_interception=1; c_interception=0; d_interception=0; soil_albedo=0.3; SoilHeatFluxFraction=0; MinimumHeightDiffForNewLayer=0; NightInterceptionFraction=0; ReferenceHeight=0
          Irrigation
          Fertiliser
          SurfaceOrganicMatter: InitialResidueName=wheat; InitialResidueType=wheat; InitialResidueMass=0; InitialStandingFraction=0; InitialCPR=0; InitialCNR=80
          Report DailyReport: same as Mungbean_REMS.aps18.aps18.paddock.DailyReport
          Manager SowingRule
            RowSpacing = 250
            SowingDepth = 30
            SowingRate = 30
            CultivarName = Emerald
            SowingDate = 01/13/2015 00:00:00
            script: same as in Mungbean_REMS.aps18.aps18.paddock.SowingRule
          Manager HarvestRule: same as Mungbean_REMS.aps18.aps18.paddock.HarvestRule
          Report HarvestReport: same as Replacements.HarvestReport
          Plant Soybean
          Manager Irrigatefixeddates: same as Mungbean_REMS.RCM_Katherine87.RCM_Katherine87.paddock.Irrigatefixeddates
          Operations
          Manager InitialWaterReset: same as Yield_Gap.Emerald.EmeraldYieldGap.paddock.InitialWaterReset
          Soil Brown Vertosol-Talgai-shallow phase (Hermitage No033): ASCOrder=Vertosol; ASCSubOrder=Brown; SoilType=Clay; Site=Hermitage; NearestTown=Warwick, Q 4370; Region=Darling Downs and Granite Belt; State=Queensland; Country=Australia; NaturalVegetation=Poplar Box , Ironbark, Qld Blue Gum; ApsoilNumber=33; Latitude=-28.2; Longitude=152.101; LocationAccuracy=+/- 20m; YearOfSampling=0; Comments=oc and ph estimated
            DataSource=Data provided by I.  Broad, Queensland Department of Primary Industries
            Physical
              Thickness  BD    AirDry  LL15  DUL   SAT
              100        1.38  0.115   0.23  0.4   0.45
              200        1.38  0.184   0.23  0.4   0.45
              300        1.3   0.23    0.23  0.43  0.48
              300        1.37  0.23    0.23  0.4   0.45
              300        1.49  0.23    0.23  0.36  0.41
              300        1.64  0.23    0.23  0.3   0.35
              300        1.6   0.23    0.23  0.32  0.37
              BD, DUL source: Field measured and checked for sensibility
              AirDry, LL15 source: Estimated based on local knowledge
              SAT source: Calculated from measured, estimated or calculated BD
              SoilCrop SoybeanSoil: LL=[0.19, 0.19, 0.23, 0.281, 0.288, 0.3, 0.26]; KL=[0.06, 0.06, 0.06, 0.04, 0.04, 0.02, 0.02]; XF=[1, 1, 1, 1, 1, 1, 1]
            WaterBalance SoilWater: same as Mungbean_RCN_2009.Hermitage2009.Hermitage2009.paddock.Brown Vertosol-Talgai-shallow phase (Hermitage No033).SoilWater
            Organic: same as Mungbean_RCN_2009.Hermitage2009.Hermitage2009.paddock.Brown Vertosol-Talgai-shallow phase (Hermitage No033).Organic
            Chemical
              Thickness  NO3N     NH4N  PH
              150        24.1546  0     8
              150        14.4928  0     8
              300        10.2564  0     8
              300        9.73236  0     8
              300        1        0.2   8
              300        1        0.2   8
              300        1        0.2   8
              PH source: Estimated based on local knowledge
            InitialWater: PercentMethod=0; FractionFull=0.47; RelativeTo=LL15
            Sample Initial conditions: Depth=[0-180]; Thickness=[1800]; NH4=[1]; SWUnits=Volumetric; OCUnits=Total; PHUnits=Water
            Nutrient
            CERESSoilTemperature Temperature
    Experiment Pampas
      Factors
        Permutation
          Factor Sow
            CompositeFactor M7_dens25_wheat
              Specifications:
                [SowingRule].Script.SowingDate=2015-12-23
                [SowingRule].Script.SowingRate=25
                [SurfaceOrganicMatter].InitialResidueType=wheat
                [SurfaceOrganicMatter].InitialResidueMass=5000
                [SurfaceOrganicMatter].InitialCNR=80
            CompositeFactor M8_dens33_wheat
              Specifications:
                [SowingRule].Script.SowingDate=2015-12-23
                [SowingRule].Script.SowingRate=33
                [SurfaceOrganicMatter].InitialResidueType=wheat
                [SurfaceOrganicMatter].InitialResidueMass=5000
                [SurfaceOrganicMatter].InitialCNR=80
            CompositeFactor M9_dens33_faba
              Specifications:
                [SowingRule].Script.SowingDate=2015-12-23
                [SowingRule].Script.SowingRate=33
                [SurfaceOrganicMatter].InitialResidueType=fababean
                [SurfaceOrganicMatter].InitialResidueMass=2000
                [SurfaceOrganicMatter].InitialCNR=18.74
            CompositeFactor M10_dens33_canola
              Specifications:
                [SowingRule].Script.SowingDate=2015-12-23
                [SowingRule].Script.SowingRate=33
                [SurfaceOrganicMatter].InitialResidueType=canola
                [SurfaceOrganicMatter].InitialResidueMass=11000
                [SurfaceOrganicMatter].InitialCNR=40
            CompositeFactor M11_dens26_canola
              Specifications:
                [SowingRule].Script.SowingDate=2015-12-23
                [SowingRule].Script.SowingRate=26
                [SurfaceOrganicMatter].InitialResidueType=canola
                [SurfaceOrganicMatter].InitialResidueMass=11000
                [SurfaceOrganicMatter].InitialCNR=40
            CompositeFactor M12_dens25_fallow
              Specifications:
                [SowingRule].Script.SowingDate=2015-12-23
                [SowingRule].Script.SowingRate=25
                [SurfaceOrganicMatter].InitialResidueType=fieldpea
                [SurfaceOrganicMatter].InitialResidueMass=2000
                [SurfaceOrganicMatter].InitialCNR=130
            CompositeFactor S3_Dec8_dens37_fallow
              Specifications:
                [SowingRule].Script.SowingDate=2015-12-08
                [SowingRule].Script.SowingRate=37
                [SurfaceOrganicMatter].InitialResidueType=fieldpea
                [SurfaceOrganicMatter].InitialResidueMass=0
                [SurfaceOrganicMatter].InitialCNR=0
            CompositeFactor S6_Dec8_dens36_fallow
              Specifications:
                [SowingRule].Script.SowingDate=2015-12-08
                [SowingRule].Script.SowingRate=36
                [SurfaceOrganicMatter].InitialResidueType=fieldpea
                [SurfaceOrganicMatter].InitialResidueMass=0
                [SurfaceOrganicMatter].InitialCNR=0
            CompositeFactor S14_Jan19_dens23_fallow
              Specifications:
                [SowingRule].Script.SowingDate=2016-1-19
                [SowingRule].Script.SowingRate=23
                [SurfaceOrganicMatter].InitialResidueType=fieldpea
                [SurfaceOrganicMatter].InitialResidueMass=0
                [SurfaceOrganicMatter].InitialCNR=0
      Simulation Pampas
        Clock: Start=2015-12-08; End=2017-06-06
        Summary summaryfile
        Weather: FileName=Yield Gap Study\2.ClimateFiles\Hermitage Stn 41044.met
        SoilArbitrator Soil Arbitrator
        Zone paddock: Area=1; Slope=0; AspectAngle=0; Altitude=50
          MicroClimate: a_interception=0; b_interception=1; c_interception=0; d_interception=0; soil_albedo=0.3; SoilHeatFluxFraction=0; MinimumHeightDiffForNewLayer=0; NightInterceptionFraction=0; ReferenceHeight=0
          Irrigation
          Fertiliser
          SurfaceOrganicMatter: InitialResidueName=wheat; InitialResidueType=wheat; InitialResidueMass=0; InitialStandingFraction=0; InitialCPR=0; InitialCNR=80
          Report DailyReport: same as Mungbean_REMS.aps18.aps18.paddock.DailyReport
          Manager SowingRule: same as Yield_Gap.HRS.HRS.paddock.SowingRule
          Manager HarvestRule: same as Mungbean_REMS.aps18.aps18.paddock.HarvestRule
          Report HarvestReport: same as Replacements.HarvestReport
          Plant Soybean
          Manager Irrigatefixeddates: same as Mungbean_REMS.RCM_Katherine87.RCM_Katherine87.paddock.Irrigatefixeddates
          Operations
          Manager InitialWaterReset: same as Yield_Gap.Emerald.EmeraldYieldGap.paddock.InitialWaterReset
          Soil: Latitude=0; Longitude=0; YearOfSampling=0
            Sample Initial nitrogen: Thickness=[100, 200, 300, 300, 300, 300]; SW=[0.321, 0.434, 0.45, 0.482, 0.411, 0.385]; SWUnits=Volumetric; OCUnits=Total; PHUnits=Water
            Physical
              Thickness  BD     AirDry  LL15  DUL         SAT
              100        1.32   0.23    0.25  0.45190891  0.502
              200        1.24   0.26    0.28  0.452859    0.503
              300        1.24   0.29    0.29  0.46217408  0.512
              300        1.29   0.29    0.29  0.46098     0.511
              300        1.382  0.29    0.29  0.428484    0.478
              300        1.478  0.29    0.29  0.42        0.442
              300        1.46   0.29    0.29  0.4         0.424
              SoilCrop SoybeanSoil: LL=[0.25, 0.28, 0.31, 0.32, 0.33, 0.42, 0.4]; KL=[0.06, 0.06, 0.4, 0.4, 0.3, 0.02, 0.02]; XF=[1, 1, 1, 1, 1, 1, 1]
            WaterBalance SoilWater: SummerDate=1-Nov; SummerU=6; SummerCona=3.5; WinterDate=1-Apr; WinterU=6; WinterCona=3.5; DiffusConst=40; DiffusSlope=16; Salb=0.13; CN2Bare=73; CNRed=20; CNCov=0.8; Thickness=[150, 150, 300, 300, 300, 300, 300]; SWCON=[0.3, 0.3, 0.3, 0.3, 0.3, 0.3, 0.3]
            Organic: FOMCNRatio=40
              Thickness  Carbon  SoilCNRatio  FBiom  FInert  FOM
              100        1.22    12.5         0.025  0.4     82.9287
              200        1.13    12.5         0.02   0.6     55.5888
              300        1.016   12.5         0.015  0.8     30.5078
              300        0.854   12.5         0.01   0.9     16.743
              300        0.517   12.5         0.01   0.95    9.18877
              300        0.306   12.5         0.01   0.95    5.0429
            Chemical
              Thickness  NO3N    NH4N    PH    CL     EC
              100        11      2.75    7.35  -      0.2
              200        11      2.75    8.05  -      0.25
              300        10.25   2.5     8.48  8.14   0.31
              300        14      2.25    8.87  9.42   0.4
              300        1       0.2     9.09  19.24  0.59
              300        1       0.2     9.15  38.29  0.84
              300        1       0.2     -     -      -
              999999     999999  999999  -     -      -
              999999     999999  999999  -     -      -
              999999     999999  999999  -     -      0.2
              999999     999999  999999  -     -      0.23
              999999     999999  999999  -     -      0.24
            InitialWater Initial water: PercentMethod=0; FractionFull=1
            Nutrient
            CERESSoilTemperature Temperature
    Simulation TheGlen2013_14S
      Clock: Start=2014-02-18; End=2014-05-20
      Summary summaryfile
      Weather: FileName=Yield Gap Study\2.ClimateFiles\The_Glen.met
      SoilArbitrator Soil Arbitrator
      Zone paddock: Area=1; Slope=0; AspectAngle=0; Altitude=50
        MicroClimate: a_interception=0; b_interception=1; c_interception=0; d_interception=0; soil_albedo=0.3; SoilHeatFluxFraction=0; MinimumHeightDiffForNewLayer=0; NightInterceptionFraction=0; ReferenceHeight=0
        Irrigation
        Fertiliser
        SurfaceOrganicMatter: InitialResidueName=wheat; InitialResidueType=wheat; InitialResidueMass=0; InitialStandingFraction=0; InitialCPR=0; InitialCNR=80
        Report DailyReport: same as Mungbean_REMS.aps18.aps18.paddock.DailyReport
        Manager SowingRule
          SowingRate = 30
          SowingDate = 02/18/2014 00:00:00
          RowSpacing = 250
          SowingDepth = 30
          CultivarName = Emerald
          script: same as in Mungbean_REMS.aps18.aps18.paddock.SowingRule
        Manager HarvestRule: same as Mungbean_REMS.aps18.aps18.paddock.HarvestRule
        Report HarvestReport: same as Replacements.HarvestReport
        Plant Soybean
        Manager Irrigatefixeddates: same as Mungbean_REMS.RCM_Katherine87.RCM_Katherine87.paddock.Irrigatefixeddates
        Operations
        Soil Grey Vertosol Downs (Capella No1275): ASCOrder=Vertosol; SoilType=Grey Vertosol; LocalName=Downs; Site=Capella; NearestTown=Capella; Region=Central Highlands; State=Queensland; Country=Australia; NaturalVegetation=Brigalow; ApsoilNumber=1275; Latitude=-23.2321; Longitude=148.11336; LocationAccuracy=+/-20 m; YearOfSampling=2015; DataSource=Brett Cocks CSIRO Agriculture; Comments=Plain on back plain
          Physical
            Thickness  BD       AirDry    LL15      DUL       SAT
            100        1.30147  0.130581  0.261162  0.428878  0.478878
            200        1.18974  0.20893   0.261162  0.471043  0.521043
            300        1.18506  0.261162  0.261162  0.472806  0.522806
            300        1.2471   0.261162  0.261162  0.449397  0.499397
            300        1.44899  0.261162  0.261162  0.373212  0.423212
            BD, DUL source: Field measured and checked for sensibility
            AirDry, LL15 source: Estimated based on local knowledge
            SAT source: Calculated from measured, estimated or calculated BD
            SoilCrop SoybeanSoil: LL=[0.225, 0.239, 0.261, 0.36, 0.34]; KL=[0.6, 0.6, 0.6, 0.04, 0.04]; XF=[1, 1, 1, 1, 1]
          WaterBalance SoilWater: SummerDate=1-nov; SummerU=6; SummerCona=3.5; WinterDate=1-apr; WinterU=4; WinterCona=2.5; DiffusConst=40; DiffusSlope=16; Salb=0.12; CN2Bare=73; CNRed=20; CNCov=0.08; Thickness=[100, 200, 300, 300, 300]; SWCON=[0.3, 0.3, 0.3, 0.3, 0.3]
          Organic: FOMCNRatio=40
            Thickness  Carbon  SoilCNRatio  FBiom  FInert  FOM
            150        0.806   12           0.6    0.4     523.082
            150        0.689   12           0.4    0.6     317.265
            300        0.715   12           0.2    0.8     116.715
            300        0.494   12           0.05   0.95    42.9372
          Chemical
            Thickness  NO3N     NH4N  PH   CL   EC     ESP
            150        11.6667  4     7.4  5.4  0.096  1.62879
            150        5        4     7.9  2.4  0.097  2.37911
            300        4        4     8.1  2.8  0.133  3.3209
            300        3        4     8.6  3.3  0.17   4.56853
            EC, CL, PH source: Measured
            ESP source: C
          Sample InitialNitrogen: Thickness=[100, 200, 300, 300, 300]; SW=[0.373, 0.45, 0.448, 0.423, 0.353]; SWUnits=Volumetric; OCUnits=Total; PHUnits=Water
          InitialWater Initial water: PercentMethod=0; FractionFull=1
          Nutrient
          CERESSoilTemperature Temperature
    Simulation Belvedere2013_14S
      Clock: Start=2014-12-19; End=2015-03-23
      Summary summaryfile
      Weather: FileName=Yield Gap Study\2.ClimateFiles\Belvedere.xlsx; ExcelWorkSheetName=Sheet1
      SoilArbitrator Soil Arbitrator
      Zone paddock: Area=1; Slope=0; AspectAngle=0; Altitude=50
        MicroClimate: a_interception=0; b_interception=1; c_interception=0; d_interception=0; soil_albedo=0.3; SoilHeatFluxFraction=0; MinimumHeightDiffForNewLayer=0; NightInterceptionFraction=0; ReferenceHeight=0
        Irrigation
        Fertiliser
        SurfaceOrganicMatter: InitialResidueName=wheat; InitialResidueType=wheat; InitialResidueMass=5000; InitialStandingFraction=0; InitialCPR=0; InitialCNR=80
        Report DailyReport: same as Mungbean_REMS.aps18.aps18.paddock.DailyReport
        Manager SowingRule
          SowingDate = 12/20/2014 00:00:00
          SowingRate = 30
          CultivarName = Emerald
          RowSpacing = 250
          SowingDepth = 30
          script: same as in Mungbean_REMS.aps18.aps18.paddock.SowingRule
        Manager HarvestRule: same as Mungbean_REMS.aps18.aps18.paddock.HarvestRule
        Report HarvestReport: same as Replacements.HarvestReport
        Plant Soybean
        Manager Irrigatefixeddates: same as Mungbean_REMS.RCM_Katherine87.RCM_Katherine87.paddock.Irrigatefixeddates
        Operations
        Soil Brown Clay-Kianga Red (Banana No045): ASCOrder=Vertosol; ASCSubOrder=Brown; SoilType=Clay; Site=Banana; NearestTown=Banana, Q 4702; Region=Capricornia; State=Queensland; Country=Australia; ApsoilNumber=45; Latitude=-24.42; Longitude=150.143; LocationAccuracy=+/- 20m; YearOfSampling=0; DataSource=Qld Department of Primary Industries and Fisheries (D Lack)
          Physical
            Thickness  BD    AirDry  LL15  DUL   SAT
            100        1.34  0.09    0.18  0.35  0.4
            200        1.36  0.144   0.18  0.41  0.46
            300        1.42  0.22    0.22  0.38  0.43
            300        1.58  0.2     0.2   0.32  0.37
            300        1.55  0.19    0.19  0.34  0.39
            BD, DUL source: Field measured and checked for sensibility
            AirDry, LL15 source: Estimated based on local knowledge
            SAT source: Calculated from measured, estimated or calculated BD
            SoilCrop SoybeanSoil: LL=[0.228, 0.233, 0.242, 0.266, 0.311]; KL=[0.07, 0.07, 0.07, 0.05, 0.05]; XF=[1, 1, 1, 1, 1]
          WaterBalance SoilWater: SummerDate=1-Nov; SummerU=6; SummerCona=3.5; WinterDate=1-Apr; WinterU=4; WinterCona=2.5; DiffusConst=40; DiffusSlope=16; Salb=0.12; CN2Bare=73; CNRed=20; CNCov=0.8; Thickness=[150, 150, 300, 300, 300]; SWCON=[0.3, 0.3, 0.3, 0.3, 0.3]
          Organic: FOMCNRatio=40
            Thickness  Carbon  SoilCNRatio  FBiom  FInert  FOM
            150        1.19    12           0.04   1       446.88
            150        1.01    12           0.02   1       307.136
            300        0.45    12           0.02   1       145.081
            300        0.3     12           0.02   1       68.5313
            300        0.2     12           0.01   1       32.3719
          Chemical
            Thickness  NO3N     NH4N  PH
            150        3.66667  5     8.2
            150        3        5     8.5
            300        2        5     8.6
            300        1        5     8.6
            300        4        5     7.4
            PH source: Estimated based on local knowledge
          Sample Initial conditions: Thickness=[100, 200, 300, 300, 300, 300]; SW=[0.335, 0.386, 0.386, 0.314, 0.322, 0.327]; SWUnits=Volumetric; OCUnits=Total; PHUnits=Water
          InitialWater Initial water: PercentMethod=0; FractionFull=1
          Nutrient
          CERESSoilTemperature Temperature
    Simulation Dalby2013_14S
      Clock: Start=2014-01-30; End=2014-05-23
      Summary summaryfile
      Weather: FileName=Yield Gap Study\2.ClimateFiles\Dalby.xlsx; ExcelWorkSheetName=Dalby
      SoilArbitrator Soil Arbitrator
      Zone paddock: Area=1; Slope=0; AspectAngle=0; Altitude=50
        MicroClimate: a_interception=0; b_interception=1; c_interception=0; d_interception=0; soil_albedo=0.3; SoilHeatFluxFraction=0; MinimumHeightDiffForNewLayer=0; NightInterceptionFraction=0; ReferenceHeight=0
        Irrigation
        Fertiliser
        SurfaceOrganicMatter: InitialResidueName=wheat; InitialResidueType=wheat; InitialResidueMass=0; InitialStandingFraction=0; InitialCPR=0; InitialCNR=80
        Report DailyReport: same as Mungbean_REMS.aps18.aps18.paddock.DailyReport
        Manager SowingRule
          SowingDate = 01/30/2014 00:00:00
          SowingRate = 30
          CultivarName = Emerald
          RowSpacing = 250
          SowingDepth = 30
          script: same as in Mungbean_REMS.aps18.aps18.paddock.SowingRule
        Manager HarvestRule: same as Mungbean_REMS.aps18.aps18.paddock.HarvestRule
        Report HarvestReport: same as Replacements.HarvestReport
        Plant Soybean
        Manager Irrigatefixeddates: same as Mungbean_REMS.RCM_Katherine87.RCM_Katherine87.paddock.Irrigatefixeddates
        Operations
        Soil Black Vertosol-Bongeen (Dalby No027): ASCOrder=Vertosol; ASCSubOrder=Black; SoilType=Clay; Site=Dalby; NearestTown=Dalby, Q 4405; Region=Darling Downs and Granite Belt; State=Queensland; Country=Australia; ApsoilNumber=27; Latitude=-27.12; Longitude=151.305; LocationAccuracy=+/- 20m; YearOfSampling=0; DataSource=CSIRO Sustainable Ecosystems, Toowoomba
          Comments=Toowoomba - Wheat ll,xf copied from sorghum. Wheat kl is just default apsim kl values for wheat.
          Physical
            Thickness  BD    AirDry  LL15  DUL   SAT
            100        1.25  0.115   0.23  0.45  0.5
            200        1.31  0.184   0.23  0.43  0.48
            300        1.23  0.23    0.23  0.46  0.51
            300        1.24  0.23    0.23  0.45  0.5
            300        1.25  0.23    0.23  0.45  0.5
            300        1.26  0.23    0.23  0.44  0.49
            300        1.29  0.23    0.23  0.43  0.48
            BD, DUL source: Field measured and checked for sensibility
            AirDry, LL15 source: Estimated based on local knowledge
            SAT source: Calculated from measured, estimated or calculated BD
            SoilCrop SoybeanSoil: LL=[0.23, 0.24, 0.29, 0.395, 0.424, 0.44, 0.43]; KL=[0.06, 0.06, 0.06, 0.04, 0.04, 0.02, 0.01]; XF=[1, 1, 1, 1, 1, 1, 1]
          WaterBalance SoilWater: same as Mungbean_RCN_2009.Hermitage2009.Hermitage2009.paddock.Brown Vertosol-Talgai-shallow phase (Hermitage No033).SoilWater
          Organic: FOMCNRatio=40
            Thickness  Carbon  SoilCNRatio  FBiom  FInert  FOM
            150        1.19    12           0.04   0.4     347.129
            150        1.01    12           0.02   0.6     270.344
            300        0.45    12           0.02   0.8     163.972
            300        0.3     12           0.02   1       99.4541
            300        0.2     12           0.01   1       60.322
            300        0.16    12           0.01   1       36.5871
            300        0.17    12           0.01   1       22.1912
          Chemical
            Thickness  NO3N     NH4N  PH
            150        26.4224  0     8.2
            150        15.2672  0     8.5
            300        10.8401  0     8.6
            300        10.7527  0     8.6
            300        1        0.2   7.4
            300        1        0.2   5.3
            300        1        0.2   5.3
            PH source: Estimated based on local knowledge
          InitialWater: PercentMethod=0; FractionFull=0.27; RelativeTo=LL15
          Sample Initial conditions: Depth=[0-180]; Thickness=[1800]; NH4=[1]; SWUnits=Volumetric; OCUnits=Total; PHUnits=Water
          Nutrient
          CERESSoilTemperature Temperature
    Simulation Warra
      Clock: Start=2013-02-18; End=2016-05-15
      Summary summaryfile
      Weather: FileName=Yield Gap Study\2.ClimateFiles\EhlmaPark.xlsx; ExcelWorkSheetName=EhlmaPark
      SoilArbitrator Soil Arbitrator
      Zone paddock: Area=1; Slope=0; AspectAngle=0; Altitude=50
        MicroClimate: a_interception=0; b_interception=1; c_interception=0; d_interception=0; soil_albedo=0.3; SoilHeatFluxFraction=0; MinimumHeightDiffForNewLayer=0; NightInterceptionFraction=0; ReferenceHeight=0
        Irrigation
        Fertiliser
        SurfaceOrganicMatter: InitialResidueName=wheat; InitialResidueType=wheat; InitialResidueMass=5000; InitialStandingFraction=0; InitialCPR=0; InitialCNR=80
        Report DailyReport: same as Mungbean_REMS.aps18.aps18.paddock.DailyReport
        Manager SowingRule
          RowSpacing = 250
          SowingDepth = 30
          SowingRate = 30
          CultivarName = Emerald
          SowingDate = 02/18/2014 00:00:00
          script: same as in Mungbean_RCN_2016.Emerald2016.Emerald2016.paddock.SowingRule
        Manager HarvestRule: same as Mungbean_REMS.aps18.aps18.paddock.HarvestRule
        Report HarvestReport: same as Replacements.HarvestReport
        Plant Soybean
        Manager Irrigatefixeddates: same as Mungbean_REMS.RCM_Katherine87.RCM_Katherine87.paddock.Irrigatefixeddates
        Operations
          2013-12-10  [SowingRule].Script.Sow()
          2014-12-23  [SowingRule].Script.Sow()
          2015-12-11  [SowingRule].Script.Sow()
        Soil Grey Vertosol-Brigalow (Haystack No022): ASCOrder=Vertosol; ASCSubOrder=Grey; SoilType=Clay; Site=Haystack; NearestTown=Brigalow, Q 4412; Region=Darling Downs and Granite Belt; State=Queensland; Country=Australia; NaturalVegetation=Brigalow scrub; ApsoilNumber=22; Latitude=-26.836; Longitude=150.855; LocationAccuracy=+/- 20m; YearOfSampling=0; DataSource=CSIRO Sustainable Ecosystems, Toowoomba
          WaterBalance SoilWater: same as Mungbean_RCN_2009.Hermitage2009.Hermitage2009.paddock.Brown Vertosol-Talgai-shallow phase (Hermitage No033).SoilWater
          Organic: same as Yield_Gap.Dalby2013_14S.paddock.Black Vertosol-Bongeen (Dalby No027).Organic
          Chemical
            Thickness  NO3N     NH4N  PH
            150        23.4742  0     8.2
            150        14.0845  0     8.5
            300        9.32401  0     8.6
            300        9.38967  0     8.6
            300        1        0.2   7.4
            300        1        0.2   5.3
            300        1        0.2   5.3
            PH source: Estimated based on local knowledge
          InitialWater: PercentMethod=0; FractionFull=0.18; RelativeTo=mungbeanSoil
          Sample Initial conditions: Depth=[0-180]; Thickness=[1800]; NH4=[1]; SWUnits=Volumetric; OCUnits=Total; PHUnits=Water
          Physical
            Thickness  BD    AirDry  LL15  DUL   SAT
            100        1.42  0.095   0.19  0.39  0.44
            200        1.42  0.152   0.19  0.38  0.43
            300        1.43  0.19    0.19  0.38  0.43
            300        1.42  0.19    0.19  0.38  0.43
            300        1.4   0.19    0.19  0.39  0.44
            300        1.45  0.19    0.19  0.37  0.42
            300        1.47  0.19    0.19  0.36  0.41
            SoilCrop SoybeanSoil: LL=[0.19, 0.19, 0.19, 0.295, 0.354, 0.37, 0.36]; KL=[0.06, 0.06, 0.06, 0.04, 0.04, 0.02, 0.02]; XF=[1, 1, 1, 1, 1, 1, 1]
          Nutrient
          CERESSoilTemperature Temperature
        Manager InitialWaterReset: same as Yield_Gap.Emerald.EmeraldYieldGap.paddock.InitialWaterReset
    Simulation Kingaroy
      Clock: Start=2015-11-20; End=2016-06-05
      Summary summaryfile
      Weather: FileName=Yield Gap Study\2.ClimateFiles\Kingaroy_Airport_40922.met
      SoilArbitrator Soil Arbitrator
      Zone paddock: Area=1; Slope=0; AspectAngle=0; Altitude=50
        MicroClimate: a_interception=0; b_interception=1; c_interception=0; d_interception=0; soil_albedo=0.3; SoilHeatFluxFraction=0; MinimumHeightDiffForNewLayer=0; NightInterceptionFraction=0; ReferenceHeight=0
        Irrigation
        Fertiliser
        SurfaceOrganicMatter: InitialResidueName=wheat; InitialResidueType=wheat; InitialResidueMass=0; InitialStandingFraction=0; InitialCPR=0; InitialCNR=80
        Report DailyReport: same as Mungbean_REMS.aps18.aps18.paddock.DailyReport
        Manager SowingRule
          SowingDate = 02/10/2016 00:00:00
          SowingRate = 30
          CultivarName = Emerald
          RowSpacing = 250
          SowingDepth = 30
          script: same as in Mungbean_REMS.aps18.aps18.paddock.SowingRule
        Manager HarvestRule: same as Mungbean_REMS.aps18.aps18.paddock.HarvestRule
        Report HarvestReport: same as Replacements.HarvestReport
        Plant Soybean
        Manager Irrigatefixeddates: same as Mungbean_REMS.RCM_Katherine87.RCM_Katherine87.paddock.Irrigatefixeddates
        Operations
        Manager InitialWaterReset: same as Yield_Gap.Emerald.EmeraldYieldGap.paddock.InitialWaterReset
        Soil Black Vertosol (Kumbia No162): ASCOrder=Vertosol; ASCSubOrder=Black; SoilType=Clay; Site=Hale Creek; NearestTown=Kumbia; Region=Wide Bay and Burnett; State=Queensland; Country=Australia; ApsoilNumber=162; Latitude=-26.688; Longitude=151.656; LocationAccuracy=+/- 10km; YearOfSampling=0; Comments=Wheat CLL estimated
          DataSource=CSIRO Tropical Crops and Pastures in collaboration with Agforce Queensland
          Physical
            Thickness  BD     AirDry  LL15  DUL    SAT
            100        1.032  0.155   0.31  0.53   0.58
            200        1.054  0.248   0.31  0.522  0.572
            300        1.026  0.31    0.31  0.533  0.583
            300        1.05   0.31    0.31  0.524  0.574
            300        1.142  0.31    0.31  0.489  0.539
            300        1.213  0.31    0.31  0.462  0.512
            300        1.249  0.31    0.31  0.449  0.499
            SoilCrop SoybeanSoil: LL=[0.31, 0.31, 0.31, 0.447, 0.463, 0.462, 0.449]; KL=[0.06, 0.06, 0.06, 0.04, 0.04, 0.02, 0.01]; XF=[1, 1, 1, 1, 1, 1, 1]
          WaterBalance SoilWater: same as Mungbean_RCN_2009.Hermitage2009.Hermitage2009.paddock.Brown Vertosol-Talgai-shallow phase (Hermitage No033).SoilWater
          Organic: FOMCNRatio=40
            Thickness  Carbon  SoilCNRatio  FBiom  FInert  FOM
            150        2.236   12           0.04   0.4     347.129
            150        1.794   12           0.02   0.6     270.344
            300        1.118   12           0.02   0.8     163.972
            300        0.559   12           0.02   1       99.4541
            300        0.338   12           0.01   1       60.322
            300        0.221   12           0.01   1       36.5871
            300        0.221   12           0.01   1       22.1912
          Chemical
            Thickness  NO3N     NH4N  PH   CL     EC
            150        32.1649  0     6.9  37.5   0.1
            150        18.9753  0     7.3  52.1   0.1
            300        12.9955  0     7.9  232.5  0.4
            300        12.6984  0     8.1  501.3  0.5
            300        1        0.2   8.1  700.5  0.6
            300        1        0.2   8.1  689.6  0.6
            300        1        0.2   8.1  559.6  0.5
            PH source: Unknown source or quality of data
          InitialWater: PercentMethod=0; FractionFull=0.45; RelativeTo=LL15
          Sample Initial conditions: Depth=[0-180]; Thickness=[1800]; NH4=[1]; SWUnits=Volumetric; OCUnits=Total; PHUnits=Water
          Nutrient
          CERESSoilTemperature Temperature
        Weather: FileName=Yield Gap Study\2.ClimateFiles\Kingaroy_Airport_40922.met
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