Simulations: Version=148
  Replacements
    Plant Mungbean: PlantType=Soybean; IsAlive=false; IsEnding=false; DaysAfterEnding=0
      OrganArbitrator Arbitrator
        BiomassTypeArbitrator DMArbitration
          Folder PotentialPartitioningMethods
            ReallocationMethod
            AllocateFixationMethod
            RetranslocationMethod
            SendPotentialDMAllocationsMethod
          Folder AllocationMethods
            NutrientConstrainedAllocationMethod
            DryMatterAllocationsMethod
          RelativeAllocation ArbitrationMethod
        BiomassTypeArbitrator NArbitration
          Folder PotentialPartitioningMethods
            ReallocationMethod
          Folder ActualPartitioningMethods
            AllocateFixationMethod
            RetranslocationMethod
          Folder AllocationMethods
            NitrogenAllocationsMethod
          RelativeAllocation ArbitrationMethod
          AllocateUptakesMethod
        WaterUptakeMethod
        NitrogenUptakeMethod
      Phenology
        Memo Introduction
          In the new model we simplified phenology by taking out stages that are not measurable (e.g. end of juvenile stage) and by adding new stages that are measurable (e.g. start pod).
          The new phenology follows the V/R staging system
        LinearInterpolationFunction PreemergThermalTime
          XYPairs: X=[10, 15, 25]; Y=[30, 0, 0]
          Memo
            These parameters are aimed at capturing the delay in emergence seen in spring sowing trials. No data available to explain fully what is happening in the spring to cause the delay.
          VariableReference XValue: VariableName=[Soil].Temperature.Value
        LinearInterpolationFunction VegetativeThermalTime
          XYPairs: X=[8, 25, 30, 35]; Y=[0, 22, 22, 0]
          Memo
             The base, optimal, and maximum temperatures from the original generic legume model ([robertson_simulation_2002]) were 7.5, 30, and 40C, respectively. The values were slightly adjusted to reflect the phenology recorded in Drs. Grant and Pasley's more recent trials.
          VariableReference XValue: VariableName=[IWeather].MeanT
        LinearInterpolationFunction VegetativePhotoperiodModifier
          XYPairs: X=[11.79, 12.08, 12.37]; Y=[1, 0.9, 0.75]
          Memo
            These parameters were sources from a study using the king cultivar ([Imrie1990time]).
          VariableReference XValue: VariableName=[Phenology].Photoperiod
        HourlyInterpolation ReproductiveThermalTime: agregationMethod=0
          XYPairs Response: X=[10, 25, 30, 42]; Y=[0, 13, 28, 0]
          ThreeHourSin InterpolationMethod
          VariableReference XValue: VariableName=[IWeather].MeanT
          Memo
             The base, optimal, and maximum temperatures from the original generic legume model ([robertson_simulation_2002]) were 7.5, 30, and 40C, respectively. The values were slightly adjusted to reflect the phenology recorded in Drs. Grant and Pasley's more recent trials.
        LinearInterpolationFunction ReproductivePhotoperiodModifier
          XYPairs: X=[11.79, 12.08, 12.37]; Y=[1, 0.9, 0.9]
          Memo
            These parameters were sources from a study using the king cultivar ([Imrie1990time]).
          VariableReference XValue: VariableName=[Phenology].Photoperiod
        PhaseLookup ThermalTime
          PhaseLookupValue PreEmergence: Start=Sowing; End=Emergence
            VariableReference Base: VariableName=[Phenology].VegetativeThermalTime
          PhaseLookupValue VegetativeGrowth: Start=Emergence; End=EndCanopyDevelopment
            MultiplyFunction TT
              VariableReference Base: VariableName=[Phenology].VegetativeThermalTime
              VariableReference PPModifier: VariableName=[Phenology].VegetativePhotoperiodModifier
          PhaseLookupValue ReproductiveGrowth: Start=EndCanopyDevelopment; End=HarvestRipe
            MultiplyFunction TT
              VariableReference Base: VariableName=[Phenology].ReproductiveThermalTime
              VariableReference PPModifier: VariableName=[Phenology].ReproductivePhotoperiodModifier
        PhotoperiodFunction Photoperiod: Twilight=0; DayLength=0
        GerminatingPhase Germinating: Start=Sowing; End=Germination
        EmergingPhase Emerging: ShootLag=100; ShootRate=0.6; Start=Germination; End=Emergence; TTForTimeStep=0
          VariableReference ThermalTime: VariableName=[Phenology].PreemergThermalTime
          Memo
            Shoot rate and lag time values were sourced from the original generic legume model ([robertson_simulation_2002]).
        GenericPhase Vegetative: Start=Emergence; End=StartFlowering
          Memo
            Time from sowing (minus 100 for emergence) to first flower (average TT from Kylie Wenham's Time of Sowing Trial at Gatton). This value is adjusted for each cultivar (the dua
          Constant Target: FixedValue=680
          VariableReference Progression: VariableName=[Phenology].ThermalTime
        GenericPhase EarlyFlowering: Start=StartFlowering; End=StartPodDevelopment
          Memo
            Time from first flower(average TT from Kylie Wenham's Time of Sowing Trial at Gatton) to 50% flowering (average TT from Kylie Wenham's Time of Sowing Trial at Gatton, Thomas' Dissertation trial (Exp1-4) at Gatton, and the ACRI/Breeza/Emeral/HopelandSummer DAF experiments).
          Constant Target: FixedValue=100
          VariableReference Progression: VariableName=[Phenology].ThermalTime
        GenericPhase EarlyPodDevelopment: Start=StartPodDevelopment; End=StartGrainFilling
          Memo
            50% flowering to first pod (average TT from Kylie Wenham's TOS trial at Gatton)
          Constant Target: FixedValue=50
          VariableReference Progression: VariableName=[Phenology].ThermalTime
        GenericPhase EarlyGrainFilling: Start=StartGrainFilling; End=EndCanopyDevelopment
          Memo
            First pod(average TT from Kylie Wenham's TOS trial at Gatton) to 50% pods/grainfilling (average TT from Kylie Wenham's Time of Sowing Trial at Gatton, Thomas' Dissertation trial (Exp1-4) at Gatton, and the ACRI/Breeza/Emeral/HopelandSummer DAF experiments).
          Constant Target: FixedValue=100
          VariableReference Progression: VariableName=[Phenology].ThermalTime
        GenericPhase MidGrainFilling: Start=EndCanopyDevelopment; End=EndPodDevelopment
          Memo
            TT from 50% pods/grain filling (average TT from Kylie Wenham's Time of Sowing Trial at Gatton, Thomas' Dissertation trial (Exp1-4) at Gatton, and the ACRI/Breeza/Emeral/HopelandSummer DAF experiments) to end of grain filling (average TT from Kylie Wenham's Time of Sowing Trial at Gatton)
          Constant Target: FixedValue=100
          VariableReference Progression: VariableName=[Phenology].ThermalTime
        GenericPhase LateGrainFilling: Start=EndPodDevelopment; End=EndGrainFill
          Memo
            End of grainfilling(average TT from Kylie Wenham's TOS trial at Gatton) to maturity (average TT from Kylie Wenham's Time of Sowing Trial at Gatton, Thomas' Dissertation trial (Exp1-4) at Gatton, and the ACRI/Breeza/Emeral/HopelandSummer DAF experiments)
          Constant Target: FixedValue=100
          VariableReference Progression: VariableName=[Phenology].ThermalTime
        GenericPhase Maturing: Start=EndGrainFill; End=Maturity
          Constant Target: FixedValue=5
          VariableReference Progression: VariableName=[Phenology].ThermalTime
          Memo
            From Soybean model: uncertain of origin.
        GenericPhase Ripening: Start=Maturity; End=HarvestRipe
          Constant Target: FixedValue=5
          VariableReference Progression: VariableName=[Phenology].ThermalTime
        EndPhase ReadyForHarvesting: Start=HarvestRipe; End=Unused
          VariableReference ThermalTime: VariableName=[Phenology].ThermalTime
        OnEventFunction EmergenceDAS: SetEvent=Emergence; ReSetEvent=never
          Memo
            A function is used to provide maturity date as days after sowing(DAS).
          Constant PreEventValue: FixedValue=0
          VariableReference PostEventValue: VariableName=[Plant].DaysAfterSowing
        OnEventFunction StartFloweringDAS: SetEvent=StartFlowering; ReSetEvent=never
          Memo
            A function is used to provide maturity date as days after sowing(DAS).
          Constant PreEventValue: FixedValue=0
          VariableReference PostEventValue: VariableName=[Plant].DaysAfterSowing
        OnEventFunction StartPodDevDAS: SetEvent=StartPodDevelopment; ReSetEvent=never
          Memo
            A function is used to provide maturity date as days after sowing(DAS).
          Constant PreEventValue: FixedValue=0
          VariableReference PostEventValue: VariableName=[Plant].DaysAfterSowing
        OnEventFunction StartGrainFillingDAS: SetEvent=StartGrainFilling; ReSetEvent=never
          Memo
            A function is used to provide maturity date as days after sowing(DAS).
          Constant PreEventValue: FixedValue=0
          VariableReference PostEventValue: VariableName=[Plant].DaysAfterSowing
        OnEventFunction EndGrainFillDAS: SetEvent=EndGrainFill; ReSetEvent=never
          Memo
            A function is used to provide maturity date as days after sowing(DAS).
          Constant PreEventValue: FixedValue=0
          VariableReference PostEventValue: VariableName=[Plant].DaysAfterSowing
        OnEventFunction MaturityDAS: SetEvent=Maturity; ReSetEvent=never
          Memo
            A function is used to provide maturity date as days after sowing(DAS).
          Constant PreEventValue: FixedValue=0
          VariableReference PostEventValue: VariableName=[Plant].DaysAfterSowing
      SimpleLeaf Leaf: Albedo=0.25; Gsmax350=0.015; R50=150; LeafInitialisationStage=Emergence; Height=0; BaseHeight=0; Width=0; FRGR=0; PotentialEP=0; WaterDemand=0; KDead=0.3; LAIDead=0
        Memo Description
          Stover represents any part of the crop that is not removed at harvest (i.e not part of the product).
        RUEModel Photosynthesis
          Constant RUE: FixedValue=1.175
            Memo Thomas Dissertation data description
              Value increased form that of Robertson to reflect higher production levels of more modern varieties in Dr. Kylie Grant's time of sowing trials ([Muchow1993radiation],[ThomasThesis_2000]).
          WeightedTemperatureFunction FT: MaximumTemperatureWeighting=0.5
            XYPairs: X=[10, 20, 30, 40]; Y=[0, 1, 1, 0]
          LinearInterpolationFunction FVPD
            XYPairs: X=[0, 10, 50]; Y=[1, 1, 1]
            VariableReference XValue: VariableName=[Leaf].Photosynthesis.VPD
          LinearInterpolationFunction FN
            XYPairs: X=[0, 1, 1.5]; Y=[0, 1, 1]
            VariableReference XValue: VariableName=[Leaf].Fn
          LinearInterpolationFunction FW
            XYPairs: X=[0, 1]; Y=[0, 1]
            VariableReference XValue: VariableName=[Leaf].Fw
          RUECO2Function FCO2: PhotosyntheticPathway=C3
          VariableReference RadnInt: VariableName=[Leaf].RadiationIntercepted
        StomatalConductanceCO2Modifier
          VariableReference PhotosynthesisCO2Modifier: VariableName=[Leaf].Photosynthesis.FCO2
        MinimumFunction FRGR
          VariableReference RUE_FT: VariableName=[Leaf].Photosynthesis.FT
          MinimumFunction Others
            VariableReference RUE_FN: VariableName=[Leaf].Photosynthesis.FN
            VariableReference RUE_FVPD: VariableName=[Leaf].Photosynthesis.FVPD
        LinearInterpolationFunction ExtinctionCoefficient
          Memo
            Value was sourced from plotting LAI vs. Radiation Interception data from Dr. Kylie Grant's time of sowing trial and Thomas Dissertation ([ThomasThesis_2000]).
          XYPairs: X=[300, 1000]; Y=[0.67, 0.67]
          VariableReference XValue: VariableName=[Mungbean].SowingData.RowSpacing
        LinearInterpolationFunction Tallness
          XYPairs: X=[1, 2, 3, 4, 5, 6, 9]; Y=[0, 0, 50, 400, 700, 900, 1000]
          VariableReference XValue: VariableName=[Phenology].Stage
        AccumulateFunction NodeNumber: StartStageName=Emergence; EndStageName=EndCanopyDevelopment; FractionRemovedOnCut=1; FractionRemovedOnHarvest=1; FractionRemovedOnGraze=1; FractionRemovedOnPrune=0
          VariableReference DeltaNode: VariableName=[Leaf].DeltaNode
        Constant NReallocationFactor: FixedValue=1
          Memo
            This model assumes that all metabolic and storage N is available for reallocation from senescing leaves.
        MaximumFunction SenescenceRate
          PhaseLookup AgeDrivenSenescenceRate
            PhaseLookupValue Vegetative: Start=Emergence; End=EndPodDevelopment
              Constant DetachmentRate: FixedValue=0
            PhaseLookupValue Reproductive: Start=EndPodDevelopment; End=HarvestRipe
              Memo
                Leaf senescence rate is calculated to ensure that all leaves are senesced by crop maturity.
              BoundFunction
                Constant Lower: FixedValue=0
                Constant Upper: FixedValue=1
                DivideFunction Rate
                  VariableReference TT: VariableName=[Phenology].ThermalTime
                  SubtractFunction TTRemaining
                    ExpressionFunction TTRequired
                      Expression=[Phenology].LateGrainFilling.Target+[Phenology].Maturing.Target
                    ExpressionFunction TTComplete
                      Expression=[Phenology].LateGrainFilling.ProgressThroughPhase+[Phenology].Maturing.ProgressThroughPhase
          PhaseLookup WaterDrivenSenescenceRate
            PhaseLookupValue Vegetative: Start=Emergence; End=EndCanopyDevelopment
              Constant DetachmentRate: FixedValue=0
            PhaseLookupValue Reproductive: Start=EndCanopyDevelopment; End=HarvestRipe
              BoundFunction
                LinearInterpolationFunction WaterDrivenSenescenceRate
                  XYPairs: X=[0.1, 0.15, 1]; Y=[0.1, 0, 0]
                  VariableReference XValue: VariableName=[Leaf].Fw
                Constant Lower: FixedValue=0
                Constant Upper: FixedValue=1
              Memo Thomas Dissertation data description
                Values were sourced from Thomas Dissertation that includes 3 experiments that look at different irrigation regimes/timings/cultivars and compares mungbean to soybean.
                These experiments were used to build the original generic legume model ([robertson_simulation_2002], [ThomasThesis_2000]).
        Constant DetachmentRate: FixedValue=0.05; Units=/d
        Constant InitialWt: FixedValue=1
        Constant LaiDead: FixedValue=0; Units=m^2/m^2
        LinearInterpolationFunction MaximumNConc
          XYPairs: X=[3, 6, 8]; Y=[0.04, 0.04, 0.02]
          VariableReference XValue: VariableName=[Phenology].Stage
          Memo
            Values for maximum, critical, and minimum N concentrations sourced from Muchow et al., 1993 ([Muchow1993accumulation]).
        LinearInterpolationFunction CriticalNConc
          XYPairs: X=[3, 6, 8]; Y=[0.04, 0.04, 0.02]
          VariableReference XValue: VariableName=[Phenology].Stage
        Constant MinimumNConc: FixedValue=0.02
        Constant MaintenanceRespiration: FixedValue=0; Units=0-1
        Constant DMConversionEfficiency: FixedValue=1; Units=0-1
        BiomassRemoval BiomassRemovalDefaults
          OrganBiomassRemovalType Harvest: FractionLiveToRemove=0; FractionDeadToRemove=0; FractionLiveToResidue=1; FractionDeadToResidue=1
          OrganBiomassRemovalType Cut: FractionLiveToRemove=0; FractionDeadToRemove=0; FractionLiveToResidue=1; FractionDeadToResidue=1
          OrganBiomassRemovalType Prune: FractionLiveToRemove=0; FractionDeadToRemove=0; FractionLiveToResidue=0; FractionDeadToResidue=0
          OrganBiomassRemovalType Graze: FractionLiveToRemove=0; FractionDeadToRemove=0; FractionLiveToResidue=0; FractionDeadToResidue=0
        Constant NRetranslocationFactor: FixedValue=0.5
        Constant DMReallocationFactor: FixedValue=0
        Constant DMRetranslocationFactor: FixedValue=0.5
        Constant RemobilisationCost: FixedValue=0
        Constant CarbonConcentration: FixedValue=0.4
        BiomassDemandAndPriority DMDemands
          DivideFunction Structural
            VariableReference DeltaLAI: VariableName=[Leaf].DeltaLAI
            VariableReference SLA: VariableName=[Leaf].SpecificArea
            Memo
              Growth in leaf area is used to calculate the leaf dry matter demand.  Note that leaf biomass is assumed to consist of entirely structural dry matter.
          Constant Storage: FixedValue=0
          Constant Metabolic: FixedValue=0
          Constant QStructuralPriority: FixedValue=1
          Constant QMetabolicPriority: FixedValue=1
          Constant QStoragePriority: FixedValue=1
        BiomassDemandAndPriority NDemands
          MultiplyFunction Structural
            VariableReference MinNconc: VariableName=[Leaf].minimumNconc
            VariableReference PotentialDMAllocation: VariableName=[Leaf].potentialDMAllocation.Structural
          MultiplyFunction Metabolic
            SubtractFunction MetabolicNconc
              VariableReference CritNconc: VariableName=[Leaf].criticalNConc
              VariableReference MinNconc: VariableName=[Leaf].minimumNconc
            VariableReference PotentialDMAllocation: VariableName=[Leaf].potentialDMAllocation.Structural
          StorageNDemandFunction Storage
            Constant NitrogenDemandSwitch: FixedValue=1
            VariableReference MaxNconc: VariableName=[Leaf].maximumNconc
          Constant QStructuralPriority: FixedValue=1
          Constant QMetabolicPriority: FixedValue=1
          Constant QStoragePriority: FixedValue=1
        LinearInterpolationFunction FrostFraction
          XYPairs: X=[3, 4]; Y=[0.5, 1]
          VariableReference XValue: VariableName=[Weather].MinT
        LinearInterpolationFunction SpecificArea
          XYPairs: X=[0.1, 6]; Y=[0.01, 0.015]
          VariableReference XValue: VariableName=[Leaf].LAI
        PhaseLookup DeltaLAI
          PhaseLookupValue Vegetative: Start=Emergence; End=EndCanopyDevelopment
            MultiplyFunction Delta
              VariableReference PlantNumber: VariableName=[Mungbean].SowingData.Population
              DivideFunction LAR
                VariableReference TT: VariableName=[Phenology].VegetativeThermalTime
                VariableReference Phyllochron: VariableName=[Leaf].Phyllochron
              VariableReference BranchNumber: VariableName=[Leaf].BranchNumber
              MultiplyFunction Area
                VariableReference AreaLargestLeaf: VariableName=[Leaf].AreaLargestLeaf
                LinearInterpolationFunction RelativeArea
                  XYPairs: X=[1, 3, 8]; Y=[0.8, 1, 1]
                  VariableReference XValue: VariableName=[Leaf].NodeNumber
          PhaseLookupValue Reproductive: Start=EndCanopyDevelopment; End=HarvestRipe
            Constant: FixedValue=0
        Constant AreaLargestLeaf: FixedValue=0.006
        LinearInterpolationFunction Phyllochron
          XYPairs: X=[1, 1.5, 9, 10]; Y=[200, 70, 70, 250]
          VariableReference XValue: VariableName=[Leaf].NodeNumber
          Memo
            Values were sourced from additional phenology study conducted at Gatton, QLD in 2021.
        AddFunction BranchNumber
          Constant One: FixedValue=1
          AccumulateFunction CumulativeBranching: StartStageName=Emergence; EndStageName=EndCanopyDevelopment; FractionRemovedOnCut=1; FractionRemovedOnHarvest=1; FractionRemovedOnGraze=1; FractionRemovedOnPrune=0
            MultiplyFunction DeltaBranch
              VariableReference DeltaNode: VariableName=[Leaf].NodeNumber.DeltaNode
              VariableReference BranchingRate: VariableName=[Leaf].BranchingRate
        AccumulateFunction Number: StartStageName=Emergence; EndStageName=EndCanopyDevelopment; FractionRemovedOnCut=1; FractionRemovedOnHarvest=1; FractionRemovedOnGraze=1; FractionRemovedOnPrune=0
          MultiplyFunction DailyNumberIncrease
            VariableReference DeltaNode: VariableName=[Leaf].NodeNumber
            VariableReference BranchNumber: VariableName=[Leaf].BranchNumber
            VariableReference PlantNumber: VariableName=[Mungbean].SowingData.Population
        DivideFunction SpecificAreaCanopy
          VariableReference LAI: VariableName=[Leaf].Area
          VariableReference LeafWt: VariableName=[Leaf].Live.Wt
        BoundFunction Area
          AddFunction Area
            MultiplyFunction Initial
              Constant AreaPerPlant: FixedValue=0.005
              VariableReference Population: VariableName=[Mungbean].SowingData.Population
            SubtractFunction Change
              AccumulateAtEvent AreaGrowth: StartStageName=Emergence; EndStageName=EndCanopyDevelopment; AccumulateEventName=[Clock].DoActualPlantGrowth
                MultiplyFunction DeltaArea
                  VariableReference DeltaMass: VariableName=[Leaf].Allocated.StructuralWt
                  VariableReference SLA: VariableName=[Leaf].SpecificArea
              AccumulateAtEvent AreaLoss: StartStageName=EndCanopyDevelopment; EndStageName=HarvestRipe; AccumulateEventName=[Clock].DoActualPlantGrowth
                MultiplyFunction DeltaArea
                  VariableReference DeltaMass: VariableName=[Leaf].Senesced.StructuralWt
                  VariableReference SLA: VariableName=[Leaf].SpecificAreaCanopy
          Constant Lower: FixedValue=0
          Constant Upper: FixedValue=1000
        DivideFunction DeltaNode
          VariableReference ThermalTime: VariableName=[Phenology].VegetativeThermalTime
          VariableReference Phyllochron: VariableName=[Leaf].Phyllochron
        LinearInterpolationFunction BranchingRate
          XYPairs: X=[7, 8, 9, 10]; Y=[0, 0.2, 1.5, 1.5]
          VariableReference XValue: VariableName=[Leaf].NodeNumber
          Memo
            Values were sourced from additional phenology study conducted at Gatton, QLD in 2021.
      ReproductiveOrgan Grain: GrowthRespiration=0; MaintenanceRespiration=0
        Biomass Live
        Biomass Dead
        AddFunction FillingDuration
          VariableReference EarlyGrainFillingDuration: VariableName=[Phenology].EarlyGrainFilling.Target
          VariableReference MidGrainFillingDuration: VariableName=[Phenology].MidGrainFilling.Target
          VariableReference LateGrainFillingDuration: VariableName=[Phenology].LateGrainFilling.Target
        PhaseLookup DMDemandFunction
          PhaseLookupValue GrainFilling: Start=StartGrainFilling; End=EndGrainFill
            MultiplyFunction HIGrainDemand
              VariableReference AboveGroundWt: VariableName=[AboveGround].Wt
              DivideFunction HarvestIndexIncrease
                MaximumFunction OutstandingHarvestIndexIncrease
                  ExpressionFunction Increase: Expression=[Grain].PotentialHarvestIndex
                  Constant Zero: FixedValue=0
                SubtractFunction TTRemaining
                  ExpressionFunction ReproductiveTT
                    Expression=[Phenology].EarlyGrainFilling.Target+[Phenology].MidGrainFilling.Target+[Phenology].LateGrainFilling.Target
                  ExpressionFunction ReproductiveTTComplete
                    Expression=[Phenology].EarlyGrainFilling.ProgressThroughPhase+[Phenology].MidGrainFilling.ProgressThroughPhase+[Phenology].LateGrainFilling.ProgressThroughPhase
              VariableReference ThermalTime: VariableName=[Phenology].ThermalTime
        Constant MinimumNConc: FixedValue=0.04
          Memo
            Values for maximum, critical, and minimum N concentrations sourced from Muchow et al., 1993 ([Muchow1993accumulation]).
        LinearInterpolationFunction MaximumNConc
          VariableReference XValue: VariableName=[Phenology].Stage
          XYPairs: X=[1, 6, 8]; Y=[0.05, 0.05, 0.04]
        Constant WaterContent: FixedValue=0.12
        MultiplyFunction NFillingRate
          VariableReference NConc: VariableName=[Grain].MaximumNConc
          VariableReference DMDemand: VariableName=[Grain].DMDemandFunction
          VariableReference DMConversionEfficiency: VariableName=[Grain].DMConversionEfficiency
        BiomassRemoval BiomassRemovalDefaults
          OrganBiomassRemovalType Harvest: FractionLiveToRemove=1; FractionDeadToRemove=1; FractionLiveToResidue=0; FractionDeadToResidue=0
          OrganBiomassRemovalType Cut: FractionLiveToRemove=0; FractionDeadToRemove=0; FractionLiveToResidue=1; FractionDeadToResidue=1
          OrganBiomassRemovalType Prune: FractionLiveToRemove=0; FractionDeadToRemove=0; FractionLiveToResidue=0; FractionDeadToResidue=0
          OrganBiomassRemovalType Graze: FractionLiveToRemove=0; FractionDeadToRemove=0; FractionLiveToResidue=0; FractionDeadToResidue=0
        Constant DMConversionEfficiency: FixedValue=0.89
        Constant RemobilisationCost: FixedValue=0
        Constant CarbonConcentration: FixedValue=0.4
        DivideFunction HarvestIndex
          VariableReference GrainWt: VariableName=[Grain].Wt
          VariableReference AboveGroundWt: VariableName=[AboveGround].Wt
        Constant MaximumPotentialGrainSize: FixedValue=0
          Memo
            This parameter is not used.  Grain growth is calculated from harvest index increase.
        Constant NumberFunction: FixedValue=0
          Memo
            Grain number is not estimated by this model.
        DivideFunction LiveOnlyHI
          VariableReference GrainWt: VariableName=[Grain].Wt
          VariableReference AboveGroundWt: VariableName=[AboveGroundLive].Wt
        DivideFunction LiveOnlyNHI
          VariableReference GrainN: VariableName=[Grain].N
          VariableReference AboveGroundLiveN: VariableName=[AboveGroundLive].N
        DivideFunction NHI
          VariableReference GrainN: VariableName=[Grain].N
          VariableReference AboveGroundN: VariableName=[AboveGround].N
        DivideFunction Size
          VariableReference GrainWt: VariableName=[Grain].Wt
          VariableReference GrainNumber: VariableName=[Grain].Number
        Constant PotentialHarvestIndex: FixedValue=0.35
          Memo TOS data description
            Muchow and Charles-Edwards 1982 found that the fraction proportioned to the grain is 0.17-0.31 ([Muchow1993accumulation]). The potential harvest index was estimated to be slightly higher than these values.
        BiomassDemand DMDemandPriorityFactors
          Constant Structural: FixedValue=1
          Constant Metabolic: FixedValue=1
          Constant Storage: FixedValue=1
        BiomassDemand NDemandPriorityFactors
          Constant Structural: FixedValue=1
          Constant Metabolic: FixedValue=1
          Constant Storage: FixedValue=1
      Root: GrowthRespiration=0; MaintenanceRespiration=0
        RootShapeCylinder RootShape
        LinearInterpolationFunction KLModifier
          XYPairs: X=[0, 3]; Y=[1, 1]
          VariableReference XValue: VariableName=[Leaf].LAI
        HourlyInterpolation TemperatureEffect: agregationMethod=0
          XYPairs Response: X=[0, 26, 35]; Y=[1, 1, 1]
          ThreeHourSin InterpolationMethod
        LinearInterpolationFunction MaxDailyNUptake
          XYPairs: X=[0, 5]; Y=[1, 3]
          VariableReference XValue: VariableName=[Leaf].LAI
        Constant SenescenceRate: FixedValue=0.005
        Constant MaximumRootDepth: FixedValue=1000000
        PhaseLookup RootFrontVelocity
          PhaseLookupValue PreEmergence: Start=Germination; End=Emergence
            Constant Function: FixedValue=5
          PhaseLookupValue early: Start=Emergence; End=EndCanopyDevelopment
            Constant Function: FixedValue=22
          PhaseLookupValue late: Start=EndCanopyDevelopment; End=Maturity
            Constant Function: FixedValue=13
          Memo
            Values were sourced from Thomas Dissertation that includes 3 experiments that look at different irrigation regimes/timings/cultivars and compares mungbean to soybean.
            These experiments were used to build the original generic legume model ([robertson_simulation_2002], [ThomasThesis_2000]).
        Constant MaximumNConc: FixedValue=0.01
        Constant MinimumNConc: FixedValue=0.005
        PhaseLookupValue NitrogenDemandSwitch: Start=Emergence; End=EndGrainFill
          Constant: FixedValue=1
        LinearInterpolationFunction KNO3
          XYPairs: X=[0, 0.003]; Y=[0.02, 0.02]
          VariableReference XValue: VariableName=[Root].LengthDensity
        LinearInterpolationFunction KNH4
          XYPairs: X=[0, 0.003]; Y=[0, 0]
          VariableReference XValue: VariableName=[Root].LengthDensity
        BiomassRemoval BiomassRemovalDefaults
          OrganBiomassRemovalType Harvest: FractionLiveToRemove=0; FractionDeadToRemove=0; FractionLiveToResidue=0.2; FractionDeadToResidue=0
          OrganBiomassRemovalType Cut: FractionLiveToRemove=0; FractionDeadToRemove=0; FractionLiveToResidue=0.3; FractionDeadToResidue=0
          OrganBiomassRemovalType Prune: FractionLiveToRemove=0; FractionDeadToRemove=0; FractionLiveToResidue=0; FractionDeadToResidue=0
          OrganBiomassRemovalType Graze: FractionLiveToRemove=0; FractionDeadToRemove=0; FractionLiveToResidue=0; FractionDeadToResidue=0
        LinearInterpolationFunction NUptakeSWFactor
          XYPairs: X=[0, 1]; Y=[0, 1]
          VariableReference XValue: VariableName=[Root].RWC
        Constant SpecificRootLength: FixedValue=40; Units=m/g
        Constant DMConversionEfficiency: FixedValue=1
        Constant MaintenanceRespirationFunction: FixedValue=1
        Constant RemobilisationCost: FixedValue=0
        Constant CarbonConcentration: FixedValue=0.4
        BiomassDemandAndPriority DMDemands
          MultiplyFunction Structural
            PartitionFractionDemandFunction DMDemandFunction
              PhaseLookup PartitionFraction
                PhaseLookupValue Early: Start=Emergence; End=StartFlowering
                  Constant Function: FixedValue=0.2
                PhaseLookupValue Middle: Start=StartFlowering; End=StartGrainFilling
                  Constant Function: FixedValue=0.2
                PhaseLookupValue Late: Start=StartGrainFilling; End=Maturity
                  Constant Function: FixedValue=0.05
            Constant StructuralFraction: FixedValue=1
          Constant Metabolic: FixedValue=0
          StorageDMDemandFunction Storage
            SubtractFunction StorageFraction
              Constant One: FixedValue=1
              VariableReference StructuralFraction: VariableName=[Root].DMDemands.Structural.StructuralFraction
          Constant QStructuralPriority: FixedValue=1
          Constant QMetabolicPriority: FixedValue=1
          Constant QStoragePriority: FixedValue=1
        BiomassDemandAndPriority NDemands
          MultiplyFunction Structural
            VariableReference MinNconc: VariableName=[Root].minimumNconc
            VariableReference PotentialDMAllocation: VariableName=[Root].potentialDMAllocation.Structural
          MultiplyFunction Metabolic
            SubtractFunction MetabolicNconc
              VariableReference CritNconc: VariableName=[Root].criticalNConc
              VariableReference MinNconc: VariableName=[Root].minimumNconc
            VariableReference PotentialDMAllocation: VariableName=[Root].potentialDMAllocation.Structural
          StorageNDemandFunction Storage
            VariableReference NitrogenDemandSwitch: VariableName=[Root].nitrogenDemandSwitch
            VariableReference MaxNconc: VariableName=[Root].maximumNconc
          Constant QStructuralPriority: FixedValue=1
          Constant QMetabolicPriority: FixedValue=1
          Constant QStoragePriority: FixedValue=1
        VariableReference CriticalNConc: VariableName=[Root].MinimumNConc
        BiomassDemand InitialWt
          Constant Structural: FixedValue=0.2; Units=g/plant
          Constant Metabolic: FixedValue=0
          Constant Storage: FixedValue=0
        Constant RootDepthStressFactor: FixedValue=1
      Nodule
        Constant FixationMetabolicCost: FixedValue=0
        Constant MaximumNConc: FixedValue=0.02
        Constant MinimumNConc: FixedValue=0.01
        Constant SenescenceRate: FixedValue=0
        Constant NReallocationFactor: FixedValue=0
        PhaseLookupValue NitrogenDemandSwitch: Start=Emergence; End=EndGrainFill
          Constant: FixedValue=1
        BiomassRemoval BiomassRemovalDefaults
          OrganBiomassRemovalType Harvest: FractionLiveToRemove=0.5; FractionDeadToRemove=0; FractionLiveToResidue=0.1; FractionDeadToResidue=0
          OrganBiomassRemovalType Cut: FractionLiveToRemove=0.8; FractionDeadToRemove=0; FractionLiveToResidue=0; FractionDeadToResidue=0
          OrganBiomassRemovalType Prune: FractionLiveToRemove=0; FractionDeadToRemove=0; FractionLiveToResidue=0.6; FractionDeadToResidue=0
          OrganBiomassRemovalType Graze: FractionLiveToRemove=0.6; FractionDeadToRemove=0; FractionLiveToResidue=0.2; FractionDeadToResidue=0
        Constant InitialWtFunction: FixedValue=0; Units=g/m^2
        Constant DetachmentRateFunction: FixedValue=0; Units=/d
        Constant MaintenanceRespirationFunction: FixedValue=0; Units=0-1
        Constant DMConversionEfficiency: FixedValue=1; Units=0-1
        Constant NRetranslocationFactor: FixedValue=0
        Constant DMReallocationFactor: FixedValue=0
        Constant DMRetranslocationFactor: FixedValue=0
        VariableReference CriticalNConc: VariableName=[Nodule].MinimumNConc
        Constant RemobilisationCost: FixedValue=0
        Constant CarbonConcentration: FixedValue=0.4
        HoldFunction FixationRate: WhenToHold=StartGrainFilling
          MinimumFunction DailyPotentialFixationRate
            MultiplyFunction PotentialFixationRate
              VariableReference LiveBiomass: VariableName=[AboveGroundLive].Wt
              PhaseLookup SpecificFixationRate
                PhaseLookupValue VegetativeGrowth: Start=Emergence; End=StartFlowering
                  Constant Rate: FixedValue=0.006
                PhaseLookupValue EarlyReproductiveGrowth: Start=StartFlowering; End=EndPodDevelopment
                  Constant Rate: FixedValue=0.001
                PhaseLookupValue LateReproductiveGrowth: Start=EndPodDevelopment; End=HarvestRipe
                  Constant Rate: FixedValue=0
            Constant MaximumFixationRate1: FixedValue=0.35
        BiomassDemand DMDemands
          MultiplyFunction Structural
            PartitionFractionDemandFunction DMDemandFunction
              PhaseLookup PartitionFraction
                PhaseLookupValue Early: Start=Emergence; End=StartFlowering
                  Constant Function: FixedValue=0.03
                PhaseLookupValue Middle: Start=StartFlowering; End=StartGrainFilling
                  Constant Function: FixedValue=0.02
                PhaseLookupValue Late: Start=StartGrainFilling; End=Maturity
                  Constant Function: FixedValue=0
            Constant StructuralFraction: FixedValue=1; Units=g/g
          Constant Metabolic: FixedValue=0
          StorageDMDemandFunction Storage
            SubtractFunction StorageFraction
              Constant One: FixedValue=1
              VariableReference StructuralFraction: VariableName=[Nodule].DMDemands.Structural.StructuralFraction
        BiomassDemand NDemands
          MultiplyFunction Structural
            VariableReference MinNconc: VariableName=[Nodule].minimumNconc
            VariableReference PotentialDMAllocation: VariableName=[Nodule].potentialDMAllocation.Structural
          MultiplyFunction Metabolic
            SubtractFunction MetabolicNconc
              VariableReference CritNconc: VariableName=[Nodule].criticalNConc
              VariableReference MinNconc: VariableName=[Nodule].minimumNconc
            VariableReference PotentialDMAllocation: VariableName=[Nodule].potentialDMAllocation.Structural
          StorageNDemandFunction Storage
            VariableReference NitrogenDemandSwitch: VariableName=[Nodule].nitrogenDemandSwitch
            VariableReference MaxNconc: VariableName=[Nodule].maximumNconc
      GenericOrgan Shell: IsAboveGround=true
        Constant NReallocationFactor: FixedValue=1
        Constant NRetranslocationFactor: FixedValue=0.5
        Constant MaximumNConc: FixedValue=0.01
        VariableReference CriticalNConc: VariableName=[Shell].MinimumNConc
        Constant MinimumNConc: FixedValue=0.004
        Constant DMRetranslocationFactor: FixedValue=0.1
        PhaseLookupValue NitrogenDemandSwitch: Start=StartPodDevelopment; End=EndPodDevelopment
          Constant: FixedValue=1
        BiomassRemoval BiomassRemovalDefaults: same as Replacements.Mungbean.Leaf.BiomassRemovalDefaults
        PhaseLookup SenescenceRate
          PhaseLookupValue ReproductivePhase: Start=EndCanopyDevelopment; End=HarvestRipe
            MinimumFunction Rate
              DivideFunction Fraction
                VariableReference TT: VariableName=[Phenology].ThermalTime
                SubtractFunction TTRemaining
                  ExpressionFunction ReproductiveTT
                    Expression=[Phenology].LateGrainFilling.Target+[Phenology].Maturing.Target+[Phenology].Ripening.Target
                  ExpressionFunction ReproductiveTT1Complete
                    Expression=[Phenology].LateGrainFilling.ProgressThroughPhase+[Phenology].Maturing.ProgressThroughPhase+[Phenology].Ripening.ProgressThroughPhase
              Constant One: FixedValue=1
        Constant DetachmentRateFunction: FixedValue=0; Units=/d
        Constant MaintenanceRespirationFunction: FixedValue=0; Units=0-1
        Constant DMConversionEfficiency: FixedValue=1; Units=0-1
        Constant DMReallocationFactor: FixedValue=0
        Constant RemobilisationCost: FixedValue=0
        Constant CarbonConcentration: FixedValue=0.4
        Constant PotentialHarvestIndex: FixedValue=0.1
          Memo TOS data description
            Muchow and Charles-Edwards 1982 found that the fraction proportioned to the pods is 0.63-0.68 ([Muchow1993accumulation]).
        AddFunction FillingDuration
          VariableReference EarlyPodDevelopmentDuration: VariableName=[Phenology].EarlyPodDevelopment.Target
          VariableReference EarlyGrainFillingDuration: VariableName=[Phenology].EarlyGrainFilling.Target
          VariableReference MidGrainFillingDuration: VariableName=[Phenology].MidGrainFilling.Target
        BiomassDemandAndPriority DMDemands
          MultiplyFunction Structural
            PhaseLookup DMDemandFunction
              PhaseLookupValue PodDevelopment: Start=StartPodDevelopment; End=EndPodDevelopment
                MultiplyFunction HIPodDemand
                  VariableReference AboveGroundWt: VariableName=[AboveGround].Wt
                  DivideFunction HarvestIndexIncrease
                    VariableReference PotentialHarvestIndex: VariableName=[Shell].PotentialHarvestIndex
                    VariableReference FillingDuration: VariableName=[Shell].FillingDuration
                  VariableReference ThermalTime: VariableName=[Phenology].ThermalTime
            Constant StructuralFraction: FixedValue=1
          Constant Metabolic: FixedValue=0
          StorageDMDemandFunction Storage
            SubtractFunction StorageFraction
              Constant One: FixedValue=1
              VariableReference StructuralFraction: VariableName=[Shell].DMDemands.Structural.StructuralFraction
          Constant QStructuralPriority: FixedValue=1
          Constant QMetabolicPriority: FixedValue=1
          Constant QStoragePriority: FixedValue=1
        BiomassDemandAndPriority NDemands
          MultiplyFunction Structural
            VariableReference MinNconc: VariableName=[Shell].minimumNconc
            VariableReference PotentialDMAllocation: VariableName=[Shell].potentialDMAllocation.Structural
          StorageNDemandFunction Storage
            VariableReference NitrogenDemandSwitch: VariableName=[Shell].nitrogenDemandSwitch
            VariableReference MaxNconc: VariableName=[Shell].maximumNconc
          Constant Metabolic: FixedValue=0
          Constant QStructuralPriority: FixedValue=1
          Constant QMetabolicPriority: FixedValue=1
          Constant QStoragePriority: FixedValue=1
        RetranslocateNonStructural RetranslocateNitrogen
        BiomassDemand InitialWt
          Constant Structural: FixedValue=0; Units=g/m^2
          Constant Metabolic: FixedValue=0
          Constant Storage: FixedValue=0
        Constant Photosynthesis: FixedValue=0
        VariableReference initialNConcFunction: VariableName=[Shell].MinimumNConc
      GenericOrgan Stem: IsAboveGround=true
        Constant NReallocationFactor: FixedValue=1
        Constant NRetranslocationFactor: FixedValue=0.5
        LinearInterpolationFunction MaximumNConc
          VariableReference XValue: VariableName=[Phenology].Stage
          XYPairs: X=[1, 5, 8]; Y=[0.0135, 0.014, 0.015]
          Memo
            Values for maximum, critical, and minimum N concentrations sourced from Muchow et al., 1993 ([Muchow1993accumulation]).
        Constant MinimumNConc: FixedValue=0.0135
        PhaseLookupValue NitrogenDemandSwitch: Start=Emergence; End=EndPodDevelopment
          Constant: FixedValue=1
        BiomassRemoval BiomassRemovalDefaults
          OrganBiomassRemovalType Harvest: FractionLiveToRemove=0; FractionDeadToRemove=0; FractionLiveToResidue=1; FractionDeadToResidue=1
          OrganBiomassRemovalType Cut: FractionLiveToRemove=0; FractionDeadToRemove=0; FractionLiveToResidue=1; FractionDeadToResidue=1
          OrganBiomassRemovalType Prune: FractionLiveToRemove=0; FractionDeadToRemove=0; FractionLiveToResidue=0.6; FractionDeadToResidue=0
          OrganBiomassRemovalType Graze: FractionLiveToRemove=0.6; FractionDeadToRemove=0; FractionLiveToResidue=0.2; FractionDeadToResidue=0
        Constant DetachmentRateFunction: FixedValue=0; Units=/d
        Constant MaintenanceRespirationFunction: FixedValue=0; Units=0-1
        Constant DMConversionEfficiency: FixedValue=1; Units=0-1
        Constant DMReallocationFactor: FixedValue=0
        VariableReference CriticalNConc: VariableName=[Stem].MinimumNConc
        Constant RemobilisationCost: FixedValue=0
        Constant CarbonConcentration: FixedValue=0.4
        BiomassDemandAndPriority DMDemands
          MultiplyFunction Structural
            PhaseLookup Fraction
              PhaseLookupValue StemGrowthPhase: Start=Emergence; End=EndGrainFill
                Constant Fraction: FixedValue=1
              PhaseLookupValue PostCanopy: Start=EndGrainFill; End=Maturity
                Constant Fraction: FixedValue=0
            VariableReference DMDemand: VariableName=[Stem].PotentialGrowth
          Constant Metabolic: FixedValue=0
          MultiplyFunction Storage
            VariableReference DMDemand: VariableName=[Stem].PotentialGrowth
            SubtractFunction StorageFraction
              Constant One: FixedValue=1
              VariableReference StructuralFraction: VariableName=[Stem].DMDemands.Structural.Fraction
          Constant QStructuralPriority: FixedValue=1
          Constant QMetabolicPriority: FixedValue=1
          Constant QStoragePriority: FixedValue=1
        BiomassDemandAndPriority NDemands
          MultiplyFunction Structural
            VariableReference MinNconc: VariableName=[Stem].minimumNconc
            VariableReference PotentialDMAllocation: VariableName=[Stem].potentialDMAllocation.Structural
          MultiplyFunction Metabolic
            SubtractFunction MetabolicNconc
              VariableReference CritNconc: VariableName=[Stem].criticalNConc
              VariableReference MinNconc: VariableName=[Stem].minimumNconc
            VariableReference PotentialDMAllocation: VariableName=[Stem].potentialDMAllocation.Structural
          StorageNDemandFunction Storage
            VariableReference NitrogenDemandSwitch: VariableName=[Stem].nitrogenDemandSwitch
            VariableReference MaxNconc: VariableName=[Stem].maximumNconc
          Constant QStructuralPriority: FixedValue=1
          Constant QMetabolicPriority: FixedValue=1
          Constant QStoragePriority: FixedValue=1
        PartitionFractionDemandFunction PotentialGrowth
          PhaseLookup PartitionFraction
            Memo
              Values sourced from graphing leaf vs. stem biomass data from Dr. Kylie Grant's Time of Sowing trial and Thomas' dissertation ([ThomasThesis_2000]).
            PhaseLookupValue VegGrowthPhase: Start=Emergence; End=StartFlowering
              Constant StemFraction: FixedValue=0.4
            PhaseLookupValue GrainFilling: Start=StartFlowering; End=EndGrainFill
              Constant StemFraction: FixedValue=0.4
            PhaseLookupValue PostGrainFill: Start=EndGrainFill; End=Maturity
              Constant StemFraction: FixedValue=0
        RetranslocateNonStructural RetranslocateNitrogen
        BiomassDemand InitialWt
          Constant Structural: FixedValue=0; Units=g/m^2
          Constant Metabolic: FixedValue=0
          Constant Storage: FixedValue=0
        Constant Photosynthesis: FixedValue=0
        VariableReference initialNConcFunction: VariableName=[Stem].MinimumNConc
        PhaseLookup SenescenceRate
          PhaseLookupValue Vegetative: Start=Emergence; End=EndCanopyDevelopment
            Constant Rate: FixedValue=0
          PhaseLookupValue Reproductive: Start=EndCanopyDevelopment; End=Maturity
            Memo
              Leaf senescence rate is calculated to ensure that all leaves are senesced by crop maturity.
            BoundFunction
              Constant Lower: FixedValue=0
              Constant Upper: FixedValue=1
              DivideFunction Rate
                VariableReference TT: VariableName=[Phenology].ThermalTime
                SubtractFunction TTRemaining
                  ExpressionFunction TTRequired
                    Expression=[Phenology].MidGrainFilling.Target+[Phenology].LateGrainFilling.Target+[Phenology].Maturing.Target
                  ExpressionFunction TTComplete
                    Expression=[Phenology].MidGrainFilling.ProgressThroughPhase+[Phenology].LateGrainFilling.ProgressThroughPhase+[Phenology].Maturing.ProgressThroughPhase
        PhaseLookup DMRetranslocationFactor
          PhaseLookupValue Vegetative: Start=Emergence; End=EndCanopyDevelopment
            Constant RetranslocationFactor: FixedValue=0
          PhaseLookupValue GrainFilling: Start=EndCanopyDevelopment; End=EndGrainFill
            Constant RetranslocationFactor: FixedValue=0.3
      CompositeBiomass AboveGround: OrganNames=[Leaf, Stem, Grain, Shell]; IncludeLive=true; IncludeDead=true
      CompositeBiomass BelowGround: OrganNames=[Root, Nodule]; IncludeLive=true; IncludeDead=true
      CompositeBiomass AboveGroundLive: OrganNames=[Leaf, Stem, Grain, Shell]; IncludeLive=true; IncludeDead=false
      CompositeBiomass Total: OrganNames=[Leaf, Stem, Grain, Shell, Root, Nodule]; IncludeLive=true; IncludeDead=true
      CompositeBiomass TotalLive: OrganNames=[Leaf, Stem, Grain, Shell, Root, Nodule]; IncludeLive=true; IncludeDead=false
      CompositeBiomass TotalDead: OrganNames=[Leaf, Stem, Grain, Shell, Root, Nodule]; IncludeLive=false; IncludeDead=true
      CompositeBiomass Pod: OrganNames=[Shell, Grain]; IncludeLive=true; IncludeDead=true
      Constant MortalityRate: FixedValue=0
      CultivarFolder Cultivar
        Cultivar Berken
          Command:
            [Phenology].Vegetative.Target.FixedValue=600
            [Phenology].EarlyFlowering.Target.FixedValue=50
            [Phenology].EarlyPodDevelopment.Target.FixedValue=50
            [Phenology].EarlyGrainFilling.Target.FixedValue=50
            [Phenology].MidGrainFilling.Target.FixedValue=150
            [Phenology].LateGrainFilling.Target.FixedValue=150
            [Phenology].Maturing.Target.FixedValue=150
            [Phenology].Ripening.Target.FixedValue=150
            [Leaf].Phyllochron.XYPairs.X=1,1.5,7,8
            [Leaf].Phyllochron.XYPairs.Y=200,50,50,50
            [Phenology].ReproductivePhotoperiodModifier.XYPairs.Y=.6,.9,.75
            [Leaf].ExtinctionCoefficient.XYPairs.X=300,1000
            [Leaf].ExtinctionCoefficient.XYPairs.Y=.8,.8
        Cultivar Emerald
          Command:
            [Phenology].Vegetative.Target.FixedValue=670
            [Phenology].EarlyFlowering.Target.FixedValue=50
            [Phenology].EarlyPodDevelopment.Target.FixedValue=50
            [Phenology].EarlyGrainFilling.Target.FixedValue=50
            [Phenology].MidGrainFilling.Target.FixedValue=200
            [Phenology].LateGrainFilling.Target.FixedValue=200
            [Phenology].Maturing.Target.FixedValue=200
            [Phenology].Ripening.Target.FixedValue=200
            [Phenology].ReproductivePhotoperiodModifier.XYPairs.Y=.6,.9,.75
            [Leaf].AreaLargestLeaf.FixedValue=.03
            [Stem].PotentialGrowth.PartitionFraction.VegGrowthPhase.StemFraction.FixedValue=.3
            [Stem].PotentialGrowth.PartitionFraction.GrainFilling.StemFraction.FixedValue=.3
        Cultivar CeleraII
          Command:
            [Phenology].Vegetative.Target.FixedValue=600
            [Phenology].EarlyFlowering.Target.FixedValue=50
            [Phenology].EarlyPodDevelopment.Target.FixedValue=100
            [Phenology].EarlyGrainFilling.Target.FixedValue=100
            [Phenology].MidGrainFilling.Target.FixedValue=100
            [Phenology].LateGrainFilling.Target.FixedValue=50
            [Phenology].Maturing.Target.FixedValue=20
            [Phenology].Ripening.Target.FixedValue=5
            [Phenology].ReproductivePhotoperiodModifier.XYPairs.Y=.6,.9,1
            [Leaf].Phyllochron.XYPairs.X=1,5,12,13
            [Leaf].Phyllochron.XYPairs.Y=150,50,70,200
        Cultivar Crystal
          Command:
            [Phenology].Vegetative.Target.FixedValue=677
            [Phenology].EarlyFlowering.Target.FixedValue=50
            [Phenology].EarlyPodDevelopment.Target.FixedValue=50
            [Phenology].EarlyGrainFilling.Target.FixedValue=150
            [Phenology].MidGrainFilling.Target.FixedValue=100
            [Phenology].LateGrainFilling.Target.FixedValue=100
            [Phenology].Maturing.Target.FixedValue=5
            [Phenology].Ripening.Target.FixedValue=5
        Cultivar Jade
          Command:
            [Phenology].Vegetative.Target.FixedValue=680
            [Phenology].EarlyFlowering.Target.FixedValue=100
            [Phenology].EarlyPodDevelopment.Target.FixedValue=50
            [Phenology].EarlyGrainFilling.Target.FixedValue=100
            [Phenology].MidGrainFilling.Target.FixedValue=100
            [Phenology].LateGrainFilling.Target.FixedValue=100
            [Phenology].Maturing.Target.FixedValue=5
            [Phenology].Ripening.Target.FixedValue=5
        Cultivar Onyx
          Command:
            [Phenology].Vegetative.Target.FixedValue=656
            [Phenology].EarlyFlowering.Target.FixedValue=150
            [Phenology].EarlyPodDevelopment.Target.FixedValue=150
            [Phenology].EarlyGrainFilling.Target.FixedValue=100
            [Phenology].MidGrainFilling.Target.FixedValue=30
            [Phenology].LateGrainFilling.Target.FixedValue=30
            [Phenology].Maturing.Target.FixedValue=20
            [Phenology].Ripening.Target.FixedValue=20
        Cultivar Opal
          Command:
            [Phenology].Vegetative.Target.FixedValue=600
            [Phenology].EarlyFlowering.Target.FixedValue=100
            [Phenology].EarlyPodDevelopment.Target.FixedValue=50
            [Phenology].EarlyGrainFilling.Target.FixedValue=150
            [Phenology].MidGrainFilling.Target.FixedValue=100
            [Phenology].LateGrainFilling.Target.FixedValue=50
            [Phenology].Maturing.Target.FixedValue=20
            [Phenology].Ripening.Target.FixedValue=20
            [Leaf].Phyllochron.XYPairs.X=1,2,7,8
            [Leaf].Phyllochron.XYPairs.Y=150,70,70,150
        Cultivar King
          Command:
            [Phenology].Vegetative.Target.FixedValue=600
            [Phenology].EarlyFlowering.Target.FixedValue=50
            [Phenology].EarlyPodDevelopment.Target.FixedValue=50
            [Phenology].EarlyGrainFilling.Target.FixedValue=100
            [Phenology].MidGrainFilling.Target.FixedValue=100
            [Phenology].LateGrainFilling.Target.FixedValue=100
            [Phenology].Maturing.Target.FixedValue=20
            [Phenology].Ripening.Target.FixedValue=20
            [Leaf].AreaLargestLeaf.FixedValue=.01
            [Stem].PotentialGrowth.PartitionFraction.GrainFilling.StemFraction.FixedValue=.5
        Cultivar Shangtung
          Command:
            [Phenology].Vegetative.Target.FixedValue=500
            [Phenology].EarlyFlowering.Target.FixedValue=40
        Cultivar Satin
          Command:
            [Phenology].Vegetative.Target.FixedValue=761
            [Phenology].EarlyFlowering.Target.FixedValue=10
            [Phenology].EarlyGrainFilling.Target.FixedValue=150
        Cultivar Putland
          Command:
            [Phenology].Vegetative.Target.FixedValue=500
            [Phenology].EarlyFlowering.Target.FixedValue=40
    Report DailyReport: EventNames=[Clock].DoReport
      VariableNames:
        [Clock].Today
        [Mungbean].DaysAfterSowing
        [Mungbean].Phenology.Photoperiod.DayLength
        [Mungbean].Phenology.AccumulatedTT
        [Mungbean].Leaf.DeltaLAI.Vegetative.Delta.LAR
        [Weather].MeanT
        [Weather].MaxT
        [Soil].Temperature.Value
        [Phenology].Photoperiod
        [Mungbean].Root.NSupply
        [Soil].SoilWater.Eo
        [Soil].SoilWater.Es
        [Irrigation].IrrigationApplied
        [Root].WaterUptake
        [Soil].SoilWater.Drainage
        [Soil].SoilWater.Runoff
        [Soil].SoilWater.pond
        [Mungbean].Phenology.StartFloweringDAS
        [Mungbean].Phenology.StartGrainFillingDAS
        [Mungbean].Phenology.EndGrainFillDAS
        [Mungbean].Phenology.MaturityDAS
        [Mungbean].Phenology.AccumulatedTT
        [Mungbean].Leaf.NodeNumber
        [Mungbean].Phenology.CurrentPhaseName
        [Mungbean].Phenology.Stage
        [Mungbean].Phenology.CurrentStageName
        [Mungbean].Grain.Wt*10 as Yield
        [Mungbean].Grain.Wt
        [Mungbean].Shell.Wt
        [Mungbean].Shell.N+[Mungbean].Grain.N as Pod.N
        [Mungbean].Stem.Wt
        [Mungbean].Leaf.Wt
        [Mungbean].Root.Wt
        [Mungbean].Grain.Size
        [Mungbean].Leaf.Dead.Wt
        [Mungbean].AboveGround.Wt
        [Mungbean].AboveGroundLive.Wt
        [Mungbean].Grain.Dead.Wt
        [Mungbean].Pod.Wt
        [Mungbean].Grain.HarvestIndex
        [Mungbean].Grain.LiveOnlyHI
        [Mungbean].Leaf.Fw
        [Mungbean].Leaf.Fn
        [Mungbean].Grain.Number
        [Mungbean].Leaf.Area
        [Mungbean].Leaf.Photosynthesis.FT
        [Mungbean].Phenology.Photoperiod
        [Mungbean].Nodule.NFixed
        [Mungbean].Stem.Wt+[Mungbean].Pod.Wt as StemPodWt
        [Mungbean].Stem.N
        [Mungbean].Stem.Nconc
        [Mungbean].Leaf.N
        [Mungbean].Stem.Live.N
        [Mungbean].Grain.N
        [Mungbean].Shell.N
        [Mungbean].Shell.Live.N
        [Mungbean].Leaf.Live.N
        [Mungbean].Root.Live.N
        [Mungbean].Leaf.Live.NConc
        [Mungbean].Root.Live.NConc
        [Mungbean].Grain.Nconc
        [Mungbean].Leaf.Nconc
        [Mungbean].Stem.Nconc
        [Mungbean].Pod.NConc
        [Mungbean].Shell.Nconc
        [Mungbean].AboveGround.N
        [Mungbean].Grain.LiveOnlyNHI
        [Mungbean].Grain.NHI
        [Mungbean].Leaf.Dead.N
        [Mungbean].Pod.N
        [Mungbean].Nodule.NFixed
        [Mungbean].Root.RootFrontVelocity
        [Mungbean].Root.RootDepthStressFactor
        [Mungbean].Leaf.Transpiration
        [Mungbean].Leaf.WaterDemand
        [Mungbean].Root.Depth
        [Mungbean].Leaf.CoverTotal
        [Mungbean].Leaf.CoverTotal*100 as RadiationIntercepted
        [Mungbean].Leaf.CoverDead
        [Mungbean].Leaf.LAI
        [Mungbean].Leaf.Height
        [Mungbean].Leaf.SpecificArea
        [Mungbean].Arbitrator.N.TotalPlantDemand
        [Mungbean].Arbitrator.DM.TotalFixationSupply
        [Mungbean].Arbitrator.DM.TotalPlantDemand
        [Mungbean].Leaf.DMDemand.Total
        [Mungbean].Grain.DMDemand.Total
        [Mungbean].Stem.DMDemand.Total
        [Mungbean].Shell.DMDemand.Total
        [Mungbean].Root.DMDemand.Total
        [Soil].Nutrient.MineralN[1] as SoilN_0_10cm
        ([Soil].Nutrient.MineralN[2])+(0.3*[Soil].Nutrient.MineralN[1]) as SoilN_10_30cm
        Sum([Soil].Nutrient.MineralN[3:4]) as SoilN_30_60cm
        Sum([Soil].Nutrient.MineralN[5:6]) as SoilN_60_90cm
        [Soil].Nutrient.MineralN[7] as SoilN_90_120cm
        Sum([Soil].Nutrient.MineralN[1:4]) as SoilN90cm
        Sum([Soil].Nutrient.MineralN[1:5]) as SoilN120cm
        Sum([Soil].Nutrient.MineralN[1:8]) as TotNO3150
        TotNO3150+(([Soil].Nutrient.MineralN[9]/3)) as TotNO3160
        Sum([Soil].SoilWater.PAWmm[1:2]) as SoilPAW0_30cm
        Sum([Soil].SoilWater.PAWmm[3:4]) as SoilPAW30_60cm
        Sum([Soil].SoilWater.PAWmm[5:6]) as SoilPAW60_90cm
        [Soil].SoilWater.PAWmm[7] as SoilPAW90_120cm
        [MicroClimate].PrecipitationInterception
        [MicroClimate].PetAerodynamicTerm
        [MicroClimate].PetRadiationTerm
        [Weather].Rain
        Sum([Soil].SoilWater.SWmm[1:8]) as TotSWmm150
        (TotSWmm150+(0.33*[Soil].SoilWater.SWmm[9])) as TotSWmm160
        ([Soil].SoilWater.SW[1]) as SW10
        ((0.5*[Soil].SoilWater.SW[1])+(0.5*[Soil].SoilWater.SW[2])) as SW15
        [Soil].SoilWater.SW[2] as SW20
        ((0.5*[Soil].SoilWater.SW[2])+(0.5*[Soil].SoilWater.SW[3])) as SW30
        [Soil].SoilWater.SW[3] as SW40
        [Soil].SoilWater.SW[4] as SW50
        ((0.5*[Soil].SoilWater.SW[4])+(0.5*[Soil].SoilWater.SW[5])) as SW60
        [Soil].SoilWater.SW[5] as SW70
        [Soil].SoilWater.SW[6] as SW80
        ((0.5*[Soil].SoilWater.SW[6])+(0.5*[Soil].SoilWater.SW[7])) as SW90
        [Soil].SoilWater.SW[7] as SW110
        ((0.5*[Soil].SoilWater.SW[7])+(0.5*[Soil].SoilWater.SW[8])) as SW120
        [Soil].SoilWater.SW[8] as SW130
        ((0.5*[Soil].SoilWater.SW[8])+(0.5*[Soil].SoilWater.SW[9])) as SW150
        [Mungbean].Arbitrator.DM.TotalFixationSupply
        sum([Mungbean].Arbitrator.N.Fixation) as NFixed
        [Mungbean].Arbitrator.DM.TotalPlantDemand
        [Mungbean].Stem.RetranslocationWt
        [Mungbean].Leaf.NSupply.Reallocation
        [Mungbean].Arbitrator.DM.TotalFixationSupply
        sum([Mungbean].Arbitrator.N.Fixation) as NFixed
        [Mungbean].Arbitrator.DM.TotalPlantDemand
        [Mungbean].Root.PlantWaterPotentialFactor
        [Mungbean].Leaf.NodeNumber
        [Mungbean].Leaf.BranchNumber
        [Mungbean].Leaf.Number
        [Mungbean].Leaf.ExtinctionCoefficient
        [Mungbean].Leaf.Live.Wt
        [Mungbean].Leaf.Live.StructuralWt
        [Mungbean].Leaf.Live.MetabolicWt
        [Mungbean].Leaf.Allocated.MetabolicWt
        [Mungbean].Leaf.Allocated.StructuralWt
        [Mungbean].Leaf.Total.StructuralN
        [Mungbean].Leaf.Live.StructuralN
        [Mungbean].Leaf.Total.StorageWt
        [Mungbean].Leaf.Total.MetabolicN
        [Mungbean].Leaf.Total.StorageN
        [Mungbean].Stem.PotentialGrowth
        [Mungbean].Leaf.Dead.StructuralWt
        [Mungbean].Leaf.Dead.MetabolicWt
        [Mungbean].Leaf.Live.N
        [Mungbean].Leaf.Live.NConc
        [Mungbean].Leaf.Dead.Wt
        [Mungbean].Leaf.Dead.N
        [Mungbean].Leaf.Dead.NConc
        [Mungbean].Leaf.SpecificArea
        [Mungbean].Leaf.SpecificAreaCanopy
        [Mungbean].Leaf.Senesced.Wt
        [Mungbean].Leaf.Transpiration
        [Mungbean].Leaf.Total.StructuralWt
        [Mungbean].Stem.Live.Wt
        [Mungbean].Stem.Senesced.Wt
        [Mungbean].Stem.Total.StructuralWt
        [Mungbean].Stem.Live.StructuralWt
        [Mungbean].Stem.Live.StructuralN
        [Mungbean].Stem.Total.StorageWt
        [Mungbean].Stem.PotentialGrowth
        [Mungbean].Leaf.MaximumNConc
        [Mungbean].Leaf.MinimumNConc
        [Mungbean].Leaf.CriticalNConc
        [Mungbean].Stem.MaximumNConc
        [Mungbean].Stem.MinimumNConc
        [Mungbean].Stem.CriticalNConc
        [Mungbean].Shell.MaximumNConc
        [Mungbean].Shell.MinimumNConc
        [Mungbean].Shell.CriticalNConc
        [Mungbean].Shell.Live.Wt
        [Mungbean].Shell.Total.StructuralWt
        [Mungbean].Shell.Live.StructuralWt
        [Mungbean].Shell.Live.StructuralN
        [Mungbean].Shell.Total.StorageWt
        [Mungbean].Shell.Total.StructuralN
        [Mungbean].Stem.Total.StructuralN
    Report HarvestReport: EventNames=[Mungbean].Harvesting
      VariableNames:
        [Clock].Today
        [Mungbean].Phenology.Stage
        [Mungbean].Phenology.CurrentStageName
        [Mungbean].AboveGround.Wt
        [Mungbean].AboveGround.N
        [Mungbean].Grain.Total.Wt*10 as Yield
        [Mungbean].Grain.NConc
        [Mungbean].Grain.Size
        [Mungbean].Grain.Number
        [Mungbean].Grain.Total.Wt
        [Mungbean].Grain.Total.N
        [Mungbean].Total.Wt
        [Mungbean].Phenology.EmergenceDAS
        [Mungbean].Phenology.StartFloweringDAS
        [Mungbean].Phenology.StartGrainFillingDAS
        [Mungbean].Phenology.StartPodDevDAS
        [Mungbean].Phenology.EndGrainFillDAS
        [Mungbean].Phenology.MaturityDAS
        [Mungbean].Leaf.NodeNumber
        [Mungbean].Leaf.Area
  DataStore
    ExcelInput: SheetNames=[observed]
      FileNames=[OldValidationObserved.xlsx, DAFobserved.xlsx, CSIROobserved.xlsx, Exp1_2observed.xlsx, Exp3observed.xlsx, Exp4observed.xlsx, TOSobserved.xlsx, MuchowObserved.xlsx, PhenologyDataobserved.xlsx]
    PredictedObserved PredictedObservedHarvest: PredictedTableName=HarvestReport; ObservedTableName=Observed; FieldNameUsedForMatch=SimulationID; FieldName2UsedForMatch=Mungbean.Phenology.CurrentStageName; AllColumns=false
    PredictedObserved PredictedObservedDaily: PredictedTableName=DailyReport; ObservedTableName=Observed; FieldNameUsedForMatch=SimulationID; FieldName2UsedForMatch=Clock.Today; AllColumns=false
  Folder Building Dataset
    Folder Calibration
      Folder Thomas Dissertation
        Memo Thomas Dissertation data description
          Thomas Dissertation includes 3 experiments that look at different irrigation regimes/timings/cultivars and compares mungbean to soybean.
          These experiments were used to build the original generic legume model ([robertson_simulation_2002], [ThomasThesis_2000]).
        Experiment exp1Berken
          Memo
            Experiment at Gatton, QLD, sown on November 28 1996 on CSIRO Cooper field station. Soil type was a deep alluvial, weakly-cracking vertisol. There were 3 treatments: 1) well-watered, 2) rainfed and 3) rainfed+irrigation during pod filling. The cultivar used was Berken.
          Factors
            Permutation
              Factor Water
                CompositeFactor Irr
                  Specifications:
                    [Operations]
                    [SowingRule].Script.CultivarName=Berken
                    [AutoIrr].Script.AutoIrrigationOn=True
                  Operations Irr
                    1996-11-29  [Irrigation].Apply(amount:10)
                    1996-12-04  [Irrigation].Apply(amount: 20)
                    1996-12-10  [Irrigation].Apply(amount: 20)
                    1996-12-15  [Irrigation].Apply(amount: 20)
                    1996-12-22  [Irrigation].Apply(amount: 35)
                    1996-12-29  [Irrigation].Apply(amount: 35)
                    1997-01-06  [Irrigation].Apply(amount: 35)
                    1997-01-13  [Irrigation].Apply(amount: 35)
                    1997-01-20  [Irrigation].Apply(amount: 35)
                    1997-01-27  [Irrigation].Apply(amount: 35)
                    1997-02-03  [Irrigation].Apply(amount: 35)
                    1997-02-10  [Irrigation].Apply(amount: 35)
                    1997-02-17  [Irrigation].Apply(amount: 35)
                    1997-02-24  [Irrigation].Apply(amount: 35)
                    1997-03-01  [Irrigation].Apply(amount: 35)
                    1997-03-08  [Irrigation].Apply(amount: 35)
                    1997-03-15  [Irrigation].Apply(amount: 35)
                    1997-03-22  [Irrigation].Apply(amount: 35)
                    1997-03-29  [Irrigation].Apply(amount: 35)
                CompositeFactor RF
                  Specifications:
                    [Operations]
                    [SowingRule].Script.CultivarName=Berken
                  Operations Irr
                    1996-11-20  [Irrigation].Apply(amount:80)
                    1996-11-29  [Irrigation].Apply(amount:80)
                    1996-12-04  [Irrigation].Apply(amount: 80)
                    1996-12-10  [Irrigation].Apply(amount: 80)
                    1996-12-15  [Irrigation].Apply(amount: 80)
                    1996-12-18  [Irrigation].Apply(amount: 80)
                    1996-12-22  [Irrigation].Apply(amount: 80)
                CompositeFactor PodIrr
                  Specifications:
                    [Operations]
                    [AutoIrr].Script.AutoIrrigationOn=True
                    [SowingRule].Script.CultivarName=Berken
                  Operations Irr
                    1996-11-29  [Irrigation].Apply(amount:10)
                    1996-12-04  [Irrigation].Apply(amount: 20)
                    1996-12-10  [Irrigation].Apply(amount: 20)
                    1996-12-15  [Irrigation].Apply(amount: 20)
                    1997-01-27  [Irrigation].Apply(amount: 57)
                    1997-02-05  [Irrigation].Apply(amount: 57)
                    1997-02-12  [Irrigation].Apply(amount: 57)
          Simulation Exp1Berken
            Summary summaryfile
            SoilArbitrator Soil Arbitrator
            Clock: Start=1996-11-04; End=1997-04-30
            Weather: FileName=GattonThomas.xlsx; ExcelWorkSheetName=Hermitage
            Zone paddock: Area=1; Slope=0; AspectAngle=0; Altitude=50
              MicroClimate: a_interception=0; b_interception=1; c_interception=0; d_interception=0; SoilHeatFluxFraction=0.4; MinimumHeightDiffForNewLayer=0; NightInterceptionFraction=0.5; ReferenceHeight=2
              Irrigation
              Fertiliser
              SurfaceOrganicMatter: InitialResidueName=wheat; InitialResidueType=wheat; InitialResidueMass=500; InitialStandingFraction=0; InitialCPR=0; InitialCNR=40
              Report DailyReport: EventNames=[Clock].DoReport
                VariableNames:
                  [Clock].Today
                  [DiagnosticsVariables].Script.AccumPlantN
                  [DiagnosticsVariables].Script.AccumMineralisation
                  [DiagnosticsVariables].Script.AccumDenit
                  [DiagnosticsVariables].Script.AccumFert
                  [DiagnosticsVariables].Script.AccumLeach
                  [DiagnosticsVariables].Script.AccumDetach
                  [DiagnosticsVariables].Script.DeltaSoilOMN
                  [DiagnosticsVariables].Script.DeltaSurfaceOMN
                  [DiagnosticsVariables].Script.DeltaSoilMineralN
                  [Mungbean].Root.NSupply
                  [Soil].SoilWater.Eo
                  [Soil].SoilWater.Es
                  [DiagnosticsVariables].Script.SWC
                  [DiagnosticsVariables].Script.DUL
                  [Soil].SoilWater.Drainage
                  [Soil].SoilWater.Runoff
                  [DiagnosticsVariables].Script.OutFlowLat
                  [Soil].SoilWater.pond
                  [DiagnosticsVariables].Script.AccumEO
                  [DiagnosticsVariables].Script.AccumEP
                  [DiagnosticsVariables].Script.AccumES
                  [DiagnosticsVariables].Script.AccumDrainage
                  [DiagnosticsVariables].Script.AccumRunoff
                  [DiagnosticsVariables].Script.AccumRainfall
                  [DiagnosticsVariables].Script.AccumIrrigation
                  [DiagnosticsVariables].Script.AccumOutflowLat
                  [DiagnosticsVariables].Script.SoilWaterDeficit
                  [Mungbean].Grain.Live.Wt
                  [Mungbean].Shell.Live.Wt
                  [Mungbean].Stem.Live.Wt
                  [Mungbean].Stem.Live.Wt
                  [Mungbean].Grain.Live.N
                  [Mungbean].Shell.Live.N
                  [Mungbean].Leaf.Live.Wt
                  [Mungbean].Root.Live.Wt
                  [Mungbean].Leaf.Live.N
                  [Mungbean].Root.Live.N
                  [Mungbean].Leaf.Live.NConc
                  [Mungbean].Root.Live.NConc
                  [Mungbean].Root.WaterSupply
                  [Mungbean].Root.WaterUptake
                  [Mungbean].Leaf.Transpiration
                  [Mungbean].Leaf.WaterDemand
                  [Mungbean].Root.Depth
                  [Mungbean].Leaf.CoverTotal
                  [Mungbean].Leaf.CoverDead
                  [Mungbean].Leaf.LAI
                  [Mungbean].Leaf.Height
                  [Mungbean].Leaf.PotentialBiomass
                  [Soil].SoilWater.SWmm
                  [Soil].Nutrient.NO3.kgha
                  [DiagnosticsVariables].Script.SoilNitrogenContent
                  [Mungbean].Arbitrator.N.TotalPlantDemand
                  [MicroClimate].net_radn
                  [MicroClimate].peta
                  [MicroClimate].petr
                  [DiagnosticsVariables].Script.FomN
                  [DiagnosticsVariables].Script.HumN
                  [DiagnosticsVariables].Script.BiomN
                  [DiagnosticsVariables].Script.DltNMinRes
                  [DiagnosticsVariables].Script.DltNMinTot
                  [Mungbean].Leaf.Fw
                  [Mungbean].Leaf.Fn
                  [Mungbean].Phenology.CurrentPhase.Name
                  [Mungbean].Phenology.Stage
                  [Mungbean].Pod.Wt
                  [Mungbean].Pod.N
                  [Mungbean].Structure.LeafTipsAppeared
                  [Mungbean].Structure.MainStemPrimordiaNo
                  [Mungbean].Leaf.CohortArea[1]
                  [Mungbean].Leaf.CohortArea[2]
                  [Mungbean].Leaf.CohortArea[3]
                  [Mungbean].Leaf.CohortArea[4]
                  [Mungbean].Leaf.CohortArea[5]
                  [Mungbean].Leaf.CohortArea[6]
                  [Mungbean].Leaf.CohortArea[7]
                  [Mungbean].Leaf.CohortArea[8]
                  [Mungbean].Leaf.CohortArea[9]
                  [Mungbean].Leaf.CohortArea[10]
                  [Mungbean].Leaf.CohortArea[11]
                  [Mungbean].Leaf.CohortArea[12]
                  [Mungbean].Leaf.CohortArea[13]
                  [Mungbean].Leaf.CohortArea[14]
                  [Mungbean].Leaf.CohortArea[15]
                  [Mungbean].Leaf.AppearedCohortNo
                  [Mungbean].Leaf.DeadCohortNo
                  [Mungbean].AboveGround.Wt
                  [Mungbean].Phenology.Stage
                  [Mungbean].Structure.MainStemPrimordiaNo
                  [Mungbean].Phenology.NFF
                  [MungbeanHarvestRule].Script.FinalTag
                  [Mungbean].Grain.NumberFunction
                  [Mungbean].Shell.PodNumber
                  [Mungbean].Phenology.FN
                  [Mungbean].Phenology.FN.TotalNodes
                  [Mungbean].Phenology.FN.VegetativeNodes
              Manager HarvestRule
```csharp
using Models.PMF.Phen;
using APSIM.Shared.Utilities;
using System.Xml.Serialization;
using Models;
using Models.PMF;
using Models.Soils;
using System.Text;
using System.Collections.Generic;
using Models.Core;
using System;
using Models.Soils.Nutrients;

namespace Models
{
    [Serializable] 
    public class Script : Model
    {      
        [Link] private Plant Mungbean;
        [Link] private Zone zone;
        [Link(Type = LinkType.Path, Path = "[Mungbean].Phenology")]
        private Phenology phenology;
                    
        
        [EventSubscribe("StartOfSimulation")]
        private void OnSimulationCommencing(object sender, EventArgs e)
        {
        }       
        
        [EventSubscribe("DoManagement")]
        private void OnDoManagement(object sender, EventArgs e)
        {
        if (phenology.CurrentPhase.Name=="ReadyForHarvesting")
           {
           Mungbean.Harvest();
           Mungbean.EndCrop();
           }
        }
        
        [EventSubscribe("DoManagementCalculations")]
        private void OnDoManagementCalculations(object sender, EventArgs e)
        {
            
        }
    }
}
```
              Report HarvestReport: EventNames=[Soybean].Harvesting
                VariableNames:
                  [Clock].Today
                  [Mungbean].Phenology.Stage
                  [Mungbean].Phenology.CurrentStageName
                  [Mungbean].AboveGround.Wt
                  [Mungbean].AboveGround.N
                  [Mungbean].Grain.Total.Wt*10 as Yield
                  [Mungbean].Grain.NConc
                  [Mungbean].Grain.Size
                  [Mungbean].Grain.Number
                  [Mungbean].Grain.Total.Wt
                  [Mungbean].Grain.Total.N
                  [Mungbean].Total.Wt
              Plant Mungbean: ResourceName=Soybean
              Manager Irrigatefixeddates
                IrrigateDates = 27-oct
                Amount = 0
                Depth = 0
                Efficiency = 1
                WillRunoff = False
```csharp
using APSIM.Shared.Utilities;
using Models.PMF;
using Models.Core;
using System;
namespace Models
{
    [Serializable]
    public class Script : Model
    {
        [Link] Clock Clock;
        [Link] Irrigation Irrigation;
        
        [Separator("A component to apply irrigation on one or more dates on every year of the simulation")]

        [Description("Enter the irrigation dates as dd-mmm with comma separation (any year information entered will be ignored)")] 
        public string[] IrrigateDates { get; set; }
        
        [Description("Amount of irrigation to be applied (mm)")] 
        public double Amount { get; set; }
        
        [Description("Depth in the soil to apply the  irrigation (mm)")] 
        public double Depth { get; set; }
        
        [Description("Efficiency of irrigation (0-1)")] 
        public double Efficiency { get; set; }
        
        [Description("Will the irrigation runoff?")] 
        public bool WillRunoff { get; set; }
        
        [EventSubscribe("DoManagement")]
        private void OnDoManagement(object sender, EventArgs e)
        {
            foreach (string ddMMM in IrrigateDates)
            {
                if (DateUtilities.DatesEqual(ddMMM, Clock.Today))
                    Irrigation.Apply(amount: Amount, depth: Depth, efficiency: Efficiency, willRunoff: WillRunoff);
            }
        }
    }
}
```
              Operations
              Soil: Latitude=0; Longitude=0
                WaterBalance SoilWater: SummerDate=1-Nov; SummerU=8.8; SummerCona=3.9; WinterDate=1-Apr; WinterU=6; WinterCona=3.9; DiffusConst=20; DiffusSlope=35.4; Salb=0.13; CN2Bare=62; CNRed=20; CNCov=0.8; Thickness=[150, 150, 150, 150, 150, 150, 300, 300, 200]; SWCON=[0.48, 0.48, 0.48, 0.38, 0.38, 0.38, 0.33, 0.35, 0.35]
                CERESSoilTemperature Temperature
                Organic: FOMCNRatio=33
                  Thickness  Carbon  SoilCNRatio  FBiom  FInert  FOM
                  150        2.2     14.5         0.02   0.36    0
                  150        1.6     14.5         0.015  0.5     0
                  150        1.35    14.5         0.01   0.59    0
                  150        0.95    14.5         0.01   0.84    0
                  150        1       14.5         0.01   0.8     0
                  150        0.8     14.5         0.01   0.99    0
                  300        0.45    14.5         0.01   0.99    0
                  300        0.45    14.5         0.01   0.99    0
                  300        0.45    14.5         0.01   0.99    0
                Chemical
                  Thickness  NO3N  NH4N  PH
                  150        0.14  1     7.5
                  150        0.32  1     8
                  150        0.3   1     8
                  150        0.15  1     8
                  150        0.17  1     8
                  150        0.08  1     8
                  300        0.08  1     8
                  300        0.09  1     8
                  300        0.09  1     8
                Nutrient
                Physical
                  Thickness  BD    AirDry  LL15  DUL   SAT
                  150        1.37  0.1     0.22  0.48  0.48
                  150        1.27  0.19    0.22  0.48  0.48
                  150        1.28  0.19    0.24  0.48  0.48
                  150        1.33  0.19    0.24  0.38  0.42
                  150        1.37  0.2     0.26  0.38  0.42
                  150        1.42  0.2     0.26  0.38  0.42
                  300        1.36  0.2     0.26  0.33  0.42
                  300        1.35  0.2     0.27  0.35  0.42
                  300        1.35  0.2     0.27  0.35  0.42
                  SoilCrop MungbeanSoil: LL=[0.3, 0.3, 0.3, 0.32, 0.32, 0.32, 0.29, 0.29, 0.29]; KL=[0.04, 0.04, 0.04, 0.08, 0.08, 0.08, 0.08, 0.04, 0.04]; XF=[1, 1, 1, 1, 1, 1, 1, 1, 1]
                Sample Initial: Thickness=[150, 150, 150, 150, 150, 150, 300, 300, 300]; SW=[0.42, 0.42, 0.4, 0.4, 0.39, 0.36, 0.33, 0.34, 0.34]; SWUnits=Volumetric; OCUnits=Total; PHUnits=Water
              Manager SowingRule
                CultivarName = Emerald
                RowSpacing = 375
                SowingDepth = 50
                SowingRate = 40
                SowingDate = 11/28/1996 00:00:00
```csharp
using APSIM.Shared.Utilities;
using Models.PMF;
using Models.Core;
using System;
        
        namespace Models
        {
           [Serializable] 
           [System.Xml.Serialization.XmlInclude(typeof(Model))]
            public class Script : Model
            {      
               [Link] Plant Mungbean;
               [Link] Clock Clock;

               [Description("Spacing (mm) between rows")]
               public double RowSpacing { get; set; }
               [Description("Depth (mm) Grains are planted")]
               public double SowingDepth { get; set; }
               [Description("Seeds sown (/m2)")]
               public double SowingRate { get; set; }
               [Description("Cultivar")]
               [Display(Type=DisplayType.CultivarName)]
               public string CultivarName { get; set; }
               [Description("Sowing Date")]
               public DateTime SowingDate { get; set; }

               [EventSubscribe("DoManagement")]
               private void OnDoManagement(object sender, EventArgs e)
               {
                if (Clock.Today.Date == SowingDate)
                    Mungbean.Sow(population:SowingRate, cultivar:CultivarName, depth:SowingDepth, rowSpacing:RowSpacing, budNumber:1);
               }
            }
        }
```
              Manager AutoIrr
                AutoIrrigationOn = False
                Crop = [Mungbean]
                FASWThreshold = 0.9
                FASWDepth = 600
                weeks = 2
                afterSowing = 20
```csharp
using Models.Interfaces;
using System;
using Models.Core;
using System.Collections.Generic;
using System.Text;
using Models.Soils;
using Models.PMF;
using Models;
using System.Xml.Serialization;
using APSIM.Shared.Utilities;
using Models.Interfaces;
namespace Models
{
    [Serializable] 
    public class Script : Model
    {
        [Link] private Zone zone;
        [Link] private Irrigation irrigation;
        [Link] private ISoilWater waterBalance;
        [Link] private IPhysical soilPhysical;
        public double FASW { get; set; }
        public double WaterDeficit  { get; set; }
    


        [Description("Crop to irrigate")]
        public IPlant Crop { get; set; }
        
        [Description("Auto irrigation on?")]
        public bool AutoIrrigationOn { get; set; }

        [Description("Threshold fraction available water (0-1)")]
        public double FASWThreshold { get; set; }

        [Description("Soil depth (mm) to which fraction available water is calculated")]
        public double FASWDepth { get; set; }

        [Description("Minimum weeks between irrigations")]
        public double weeks { get; set; }

        [Description("Minimum days after sowing for first irrigation")]
        public int afterSowing { get; set; }

        private double irrigationGap = 0;    // gap between irrigations

        /// <summary>Called at start of simulation. Performs some basic error checking. </summary>
        [EventSubscribe("StartOfSimulation")]
        private void ErrorChecking(object sender, EventArgs args)
        {
            if (Crop == null)
                throw new Exception("No crop was specified in script " + Parent.Name);
        }

        [EventSubscribe("DoManagement")]
        private void OnDoManagement(object sender, EventArgs e)
        {
            if (AutoIrrigationOn && Crop.IsAlive)
            {
                   irrigationGap += 1;                // increment gap between irrigations
                CalculateFASW();                // calc FASW and WaterDeficit
                if ((FASW < FASWThreshold) && (irrigationGap >= weeks * 7))
                {
                    irrigation.Apply(WaterDeficit, depth: 0);
                    irrigationGap = 0;            // reset
                }
            }
            else
            {
                irrigationGap = weeks * 7 - afterSowing - 1;    // allow irrigation a number of days after it becomes alive/sown
            }
        }

        // Calculate the fraction of the potential available sw
        // Calculate the deficit amount from DUL
        private void CalculateFASW()
        {
            double[] LL15 = MathUtilities.Multiply(soilPhysical.LL15, soilPhysical.Thickness);
            double[] DUL = MathUtilities.Multiply(soilPhysical.DUL, soilPhysical.Thickness);
        
            int nlayr = GetLayerIndex(FASWDepth);
            double cumdep = MathUtilities.Sum(soilPhysical.Thickness, 0, nlayr, 0.0);    // tricky function that sums up to before nlayr

            double part_layer = MathUtilities.Divide((FASWDepth - cumdep), soilPhysical.Thickness[nlayr], 0.0);

            // note that results may be strange if swdep < ll15
            double avail_sw = (MathUtilities.Sum(waterBalance.SWmm, 0, nlayr, 0.0) + part_layer * waterBalance.SWmm[nlayr])
                            - (MathUtilities.Sum(LL15, 0, nlayr, 0.0) + part_layer * LL15[nlayr]);

            double pot_avail_sw = (MathUtilities.Sum(DUL, 0, nlayr, 0.0) + part_layer * DUL[nlayr])
                                - (MathUtilities.Sum(LL15, 0, nlayr, 0.0) + part_layer * LL15[nlayr]);
            
            FASW = MathUtilities.Divide(avail_sw, pot_avail_sw, 0.0);
            WaterDeficit = MathUtilities.Constrain(pot_avail_sw - avail_sw, 0.0, 100000);
        }

        // Get index of the layer that has this depth in it 
        private int GetLayerIndex(double pointDepth)
        {
            double[] cumThickness = soilPhysical.ThicknessCumulative;
            int layerIdx = 0;
            while ((layerIdx < cumThickness.Length) && (pointDepth > cumThickness[layerIdx]))
            {
                layerIdx += 1;
            }

            return layerIdx;
        }
    }
}
```
        Experiment exp1Emerald
          Memo
            Experiment at Gatton, QLD, sown on November 28 1996 on CSIRO Cooper field station. Soil type was a deep alluvial, weakly-cracking vertisol. There were 3 treatments: 1) well-watered, 2) rainfed and 3) rainfed+irrigation during pod filling. The cultivar used was Emerald.
          Factors
            Permutation
              Factor Water
                CompositeFactor Irr
                  Specifications:
                    [Operations]
                    [SowingRule].Script.CultivarName=Emerald
                    [AutoIrr].Script.AutoIrrigationOn=False
                  Operations Irr: same as Building Dataset.Calibration.Thomas Dissertation.exp1Berken.Factors.Permutation.Water.Irr.Irr
                CompositeFactor RF
                  Specifications:
                    [Operations]
                    [SowingRule].Script.CultivarName=Emerald
                  Operations Irr
                    1996-11-29  [Irrigation].Apply(amount:10)
                    1996-12-04  [Irrigation].Apply(amount: 20)
                    1996-12-10  [Irrigation].Apply(amount: 20)
                    1996-12-15  [Irrigation].Apply(amount: 20)
          Simulation Exp1Emerald
            Summary summaryfile
            SoilArbitrator Soil Arbitrator
            Clock: Start=1996-11-04; End=1997-04-30
            Weather: FileName=GattonThomas.xlsx; ExcelWorkSheetName=Hermitage
            Zone paddock: Area=1; Slope=0; AspectAngle=0; Altitude=50
              MicroClimate: a_interception=0; b_interception=1; c_interception=0; d_interception=0; SoilHeatFluxFraction=0.4; MinimumHeightDiffForNewLayer=0; NightInterceptionFraction=0.5; ReferenceHeight=2
              Irrigation
              Fertiliser
              SurfaceOrganicMatter: InitialResidueName=wheat; InitialResidueType=wheat; InitialResidueMass=500; InitialStandingFraction=0; InitialCPR=0; InitialCNR=40
              Report DailyReport: same as Building Dataset.Calibration.Thomas Dissertation.exp1Berken.Exp1Berken.paddock.DailyReport
              Manager HarvestRule: same as Building Dataset.Calibration.Thomas Dissertation.exp1Berken.Exp1Berken.paddock.HarvestRule
              Report HarvestReport: same as Building Dataset.Calibration.Thomas Dissertation.exp1Berken.Exp1Berken.paddock.HarvestReport
              Plant Mungbean: ResourceName=Soybean
              Manager Irrigatefixeddates: same as Building Dataset.Calibration.Thomas Dissertation.exp1Berken.Exp1Berken.paddock.Irrigatefixeddates
              Operations
              Soil: Latitude=0; Longitude=0
                WaterBalance SoilWater: SummerDate=1-Nov; SummerU=8.8; SummerCona=3.9; WinterDate=1-Apr; WinterU=6; WinterCona=3.9; DiffusConst=20; DiffusSlope=35.4; Salb=0.13; CN2Bare=62; CNRed=20; CNCov=0.8; Thickness=[150, 150, 150, 150, 150, 150, 300, 300, 200]; SWCON=[0.48, 0.48, 0.48, 0.45, 0.4, 0.39, 0.34, 0.34, 0.34]
                CERESSoilTemperature Temperature
                Organic: same as Building Dataset.Calibration.Thomas Dissertation.exp1Berken.Exp1Berken.paddock.soil.Organic
                Chemical: same as Building Dataset.Calibration.Thomas Dissertation.exp1Berken.Exp1Berken.paddock.soil.Chemical
                Nutrient
                Physical
                  Thickness  BD    AirDry  LL15  DUL   SAT
                  150        1.37  0.1     0.22  0.48  0.48
                  150        1.27  0.19    0.22  0.48  0.48
                  150        1.28  0.19    0.24  0.44  0.46
                  150        1.33  0.19    0.24  0.43  0.45
                  150        1.37  0.2     0.26  0.38  0.41
                  150        1.42  0.2     0.26  0.36  0.4
                  300        1.36  0.2     0.26  0.32  0.35
                  300        1.35  0.2     0.27  0.32  0.35
                  300        1.35  0.2     0.27  0.35  0.36
                  SoilCrop MungbeanSoil: LL=[0.3, 0.3, 0.3, 0.32, 0.32, 0.32, 0.3, 0.3, 0.32]; KL=[0.08, 0.08, 0.08, 0.08, 0.08, 0.08, 0.08, 0.08, 0.08]; XF=[1, 1, 1, 1, 1, 1, 1, 1, 1]
                Sample Initial: Thickness=[150, 150, 150, 150, 150, 150, 300, 300, 300]; SW=[0.48, 0.48, 0.44, 0.43, 0.39, 0.36, 0.33, 0.33, 0.34]; SWUnits=Volumetric; OCUnits=Total; PHUnits=Water
              Manager SowingRule: same as Building Dataset.Calibration.Thomas Dissertation.exp1Berken.Exp1Berken.paddock.SowingRule
              Manager AutoIrr
                AutoIrrigationOn = False
                Crop = [Mungbean]
                FASWThreshold = 0.9
                FASWDepth = 600
                weeks = 0
                afterSowing = 1
                script: same as in Building Dataset.Calibration.Thomas Dissertation.exp1Berken.Exp1Berken.paddock.AutoIrr
        Experiment exp2
          Memo
            Experiment at Gatton, QLD, sown on January 7 1997 on CSIRO Cooper field station. Soil type was a deep alluvial, weakly-cracking vertisol. There were 3 treatments: 1) well-watered, 2) rainfed and 3) terminal water stress with a rainout shelter. The cultivars used were Berken and Emerald.
          Factors
            Permutation
              Factor Water
                CompositeFactor IrrCultivarBerken
                  Specifications:
                    [Operations]
                    [SowingRule].Script.CultivarName=Berken
                    [AutoIrr].Script.AutoIrrigationOn=True
                  Operations Irr
                    1997-01-08  [Irrigation].Apply(amount:10)
                    1997-01-13  [Irrigation].Apply(amount: 20)
                    1997-01-20  [Irrigation].Apply(amount: 20)
                    1997-01-27  [Irrigation].Apply(amount: 20)
                    1997-02-03  [Irrigation].Apply(amount: 65)
                    1997-02-10  [Irrigation].Apply(amount: 65)
                    1997-02-17  [Irrigation].Apply(amount: 65)
                    1997-02-24  [Irrigation].Apply(amount: 65)
                    1997-03-24  [Irrigation].Apply(amount: 65)
                    1997-03-31  [Irrigation].Apply(amount: 65)
                CompositeFactor IrrCultivarEmerald
                  Specifications:
                    [Operations]
                    [SowingRule].Script.CultivarName=Emerald
                    [AutoIrr].Script.AutoIrrigationOn=True
                  Operations Irr
                    1997-01-08  [Irrigation].Apply(amount:10)
                    1997-01-13  [Irrigation].Apply(amount: 20)
                    1997-01-20  [Irrigation].Apply(amount: 20)
                    1997-01-27  [Irrigation].Apply(amount: 20)
                    1997-02-03  [Irrigation].Apply(amount: 35)
                    1997-02-10  [Irrigation].Apply(amount: 65)
                    1997-02-17  [Irrigation].Apply(amount: 65)
                    1997-02-24  [Irrigation].Apply(amount: 65)
                    1997-03-24  [Irrigation].Apply(amount: 65)
                    1997-03-31  [Irrigation].Apply(amount: 65)
                CompositeFactor RFCultivarBerken
                  Specifications:
                    [Operations]
                    [SowingRule].Script.CultivarName=Berken
                  Operations Irr
                    1997-01-08  [Irrigation].Apply(amount:100)
                    1997-01-13  [Irrigation].Apply(amount: 120)
                    1997-01-20  [Irrigation].Apply(amount: 120)
                CompositeFactor RFCultivarEmerald
                  Specifications:
                    [Operations]
                    [SowingRule].Script.CultivarName=Emerald
                  Operations Irr: same as Building Dataset.Calibration.Thomas Dissertation.exp2.Factors.Permutation.Water.RFCultivarBerken.Irr
                CompositeFactor TermStressCultivarBerken
                  Specifications:
                    [Operations]
                    [SowingRule].Script.CultivarName=Berken
                    [Soil].Initial.SW=0.330,0.330,0.330,0.30,0.30,0.30,0.27,0.270,0.270
                    [ClimateController].Script.RainfallMultiplier=0.4
                    [ClimateController].Script.ControlStart = 1-Feb
                    [ClimateController].Script.ControlEnd = 21-May
                  Operations Irr
                    1997-01-08  [Irrigation].Apply(amount:60)
                    1997-01-13  [Irrigation].Apply(amount: 120)
                    1997-01-20  [Irrigation].Apply(amount: 120)
                    1997-01-27  [Irrigation].Apply(amount: 20)
                    1997-02-11  [Irrigation].Apply(amount: 25)
                CompositeFactor TermStressCultivarEmerald
                  Specifications:
                    [Operations]
                    [SowingRule].Script.CultivarName=Emerald
                    [Soil].Initial.SW=0.31,0.31,0.31,0.280,0.280,0.280,0.26,0.260,0.260
                    [ClimateController].Script.RainfallMultiplier=0.5
                    [ClimateController].Script.ControlStart = 1-Feb
                    [ClimateController].Script.ControlEnd = 21-May
                  Operations Irr
                    1997-01-08  [Irrigation].Apply(amount:60)
                    1997-01-13  [Irrigation].Apply(amount: 20)
                    1997-01-20  [Irrigation].Apply(amount: 20)
                    1997-01-27  [Irrigation].Apply(amount: 20)
                    1997-02-11  [Irrigation].Apply(amount: 25)
          Simulation Exp2
            Summary summaryfile
            SoilArbitrator Soil Arbitrator
            Clock: Start=1996-12-04; End=1997-05-30
            Weather: FileName=GattonThomas.xlsx; ExcelWorkSheetName=Hermitage
            Zone paddock: Area=1; Slope=0; AspectAngle=0; Altitude=50
              Irrigation
              Fertiliser
              SurfaceOrganicMatter: InitialResidueName=wheat; InitialResidueType=wheat; InitialResidueMass=500; InitialStandingFraction=0; InitialCPR=0; InitialCNR=40
              Report DailyReport: EventNames=[Clock].DoReport
                VariableNames:
                  [Clock].Today
                  [DiagnosticsVariables].Script.AccumPlantN
                  [DiagnosticsVariables].Script.AccumMineralisation
                  [DiagnosticsVariables].Script.AccumDenit
                  [DiagnosticsVariables].Script.AccumFert
                  [DiagnosticsVariables].Script.AccumLeach
                  [DiagnosticsVariables].Script.AccumDetach
                  [DiagnosticsVariables].Script.DeltaSoilOMN
                  [DiagnosticsVariables].Script.DeltaSurfaceOMN
                  [DiagnosticsVariables].Script.DeltaSoilMineralN
                  [Soybean].Root.NSupply
                  [Soil].SoilWater.Eo
                  [Soil].SoilWater.Es
                  [DiagnosticsVariables].Script.SWC
                  [DiagnosticsVariables].Script.DUL
                  [Soil].SoilWater.Drainage
                  [Soil].SoilWater.Runoff
                  [DiagnosticsVariables].Script.OutFlowLat
                  [Soil].SoilWater.pond
                  [DiagnosticsVariables].Script.AccumEO
                  [DiagnosticsVariables].Script.AccumEP
                  [DiagnosticsVariables].Script.AccumES
                  [DiagnosticsVariables].Script.AccumDrainage
                  [DiagnosticsVariables].Script.AccumRunoff
                  [DiagnosticsVariables].Script.AccumRainfall
                  [DiagnosticsVariables].Script.AccumIrrigation
                  [DiagnosticsVariables].Script.AccumOutflowLat
                  [DiagnosticsVariables].Script.SoilWaterDeficit
                  [Soybean].Grain.Live.Wt
                  [Soybean].Shell.Live.Wt
                  [Soybean].Stem.Live.Wt
                  [Soybean].Stem.Live.Wt
                  [Soybean].Grain.Live.N
                  [Soybean].Shell.Live.N
                  [Soybean].Leaf.Live.Wt
                  [Soybean].Root.Live.Wt
                  [Soybean].Leaf.Live.N
                  [Soybean].Root.Live.N
                  [Soybean].Leaf.Live.NConc
                  [Soybean].Root.Live.NConc
                  [Soybean].Root.WaterSupply
                  [Soybean].Root.WaterUptake
                  [Soybean].Leaf.Transpiration
                  [Soybean].Leaf.WaterDemand
                  [Soybean].Root.Depth
                  [Soybean].Leaf.CoverTotal
                  [Soybean].Leaf.CoverDead
                  [Soybean].Leaf.LAI
                  [Soybean].Leaf.Height
                  [Soybean].Leaf.PotentialBiomass
                  [Soil].SoilWater.SWmm
                  [Soil].Nutrient.NO3.kgha
                  [DiagnosticsVariables].Script.SoilNitrogenContent
                  [Soybean].Arbitrator.N.TotalPlantDemand
                  [MicroClimate].net_radn
                  [MicroClimate].peta
                  [MicroClimate].petr
                  [DiagnosticsVariables].Script.FomN
                  [DiagnosticsVariables].Script.HumN
                  [DiagnosticsVariables].Script.BiomN
                  [DiagnosticsVariables].Script.DltNMinRes
                  [DiagnosticsVariables].Script.DltNMinTot
                  [Soybean].Leaf.Fw
                  [Soybean].Leaf.Fn
                  [Soybean].Phenology.CurrentPhase.Name
                  [Soybean].Phenology.Stage
                  [Soybean].Pod.Wt
                  [Soybean].Pod.N
                  [Soybean].Structure.LeafTipsAppeared
                  [Soybean].Structure.MainStemPrimordiaNo
                  [Soybean].Leaf.CohortArea[1]
                  [Soybean].Leaf.CohortArea[2]
                  [Soybean].Leaf.CohortArea[3]
                  [Soybean].Leaf.CohortArea[4]
                  [Soybean].Leaf.CohortArea[5]
                  [Soybean].Leaf.CohortArea[6]
                  [Soybean].Leaf.CohortArea[7]
                  [Soybean].Leaf.CohortArea[8]
                  [Soybean].Leaf.CohortArea[9]
                  [Soybean].Leaf.CohortArea[10]
                  [Soybean].Leaf.CohortArea[11]
                  [Soybean].Leaf.CohortArea[12]
                  [Soybean].Leaf.CohortArea[13]
                  [Soybean].Leaf.CohortArea[14]
                  [Soybean].Leaf.CohortArea[15]
                  [Soybean].Leaf.AppearedCohortNo
                  [Soybean].Leaf.DeadCohortNo
                  [Soybean].AboveGround.Wt
                  [Soybean].Phenology.Stage
                  [Soybean].Structure.MainStemPrimordiaNo
                  [Soybean].Phenology.NFF
                  [SoybeanHarvestRule].Script.FinalTag
                  [Soybean].Grain.NumberFunction
                  [Soybean].Shell.PodNumber
                  [Soybean].Phenology.FN
                  [Soybean].Phenology.FN.TotalNodes
                  [Soybean].Phenology.FN.VegetativeNodes
              Manager HarvestRule: same as Building Dataset.Calibration.Thomas Dissertation.exp1Berken.Exp1Berken.paddock.HarvestRule
              Report HarvestReport: same as Building Dataset.Calibration.Thomas Dissertation.exp1Berken.Exp1Berken.paddock.HarvestReport
              Plant Mungbean: ResourceName=Soybean
              Manager Irrigatefixeddates: same as Building Dataset.Calibration.Thomas Dissertation.exp1Berken.Exp1Berken.paddock.Irrigatefixeddates
              Operations
              Manager SowingRule
                CultivarName = Emerald
                RowSpacing = 375
                SowingDepth = 50
                SowingRate = 40
                SowingDate = 01/07/1997 00:00:00
                script: same as in Building Dataset.Calibration.Thomas Dissertation.exp1Berken.Exp1Berken.paddock.SowingRule
              Manager AutoIrr
                AutoIrrigationOn = False
                Crop = [Mungbean]
                FASWThreshold = 0.9
                FASWDepth = 600
                weeks = 2
                afterSowing = 0
                script: same as in Building Dataset.Calibration.Thomas Dissertation.exp1Berken.Exp1Berken.paddock.AutoIrr
              Soil: Latitude=0; Longitude=0
                WaterBalance SoilWater: SummerDate=1-Nov; SummerU=8.8; SummerCona=3.9; WinterDate=1-Apr; WinterU=6; WinterCona=3.9; DiffusConst=20; DiffusSlope=35.4; Salb=0.13; CN2Bare=62; CNRed=20; CNCov=0.8; Thickness=[150, 150, 150, 150, 150, 150, 300, 300, 200]; SWCON=[0.42, 0.4, 0.4, 0.37, 0.37, 0.33, 0.325, 0.33, 0.33]
                CERESSoilTemperature Temperature
                Organic: same as Building Dataset.Calibration.Thomas Dissertation.exp1Berken.Exp1Berken.paddock.soil.Organic
                Chemical: same as Building Dataset.Calibration.Thomas Dissertation.exp1Berken.Exp1Berken.paddock.soil.Chemical
                Nutrient
                Physical
                  Thickness  BD    AirDry  LL15  DUL    SAT
                  150        1.37  0.15    0.22  0.48   0.48
                  150        1.27  0.2     0.22  0.48   0.48
                  150        1.28  0.2     0.24  0.48   0.48
                  150        1.33  0.2     0.24  0.45   0.45
                  150        1.37  0.2     0.26  0.37   0.41
                  150        1.42  0.2     0.26  0.33   0.37
                  300        1.36  0.2     0.26  0.325  0.37
                  300        1.35  0.2     0.27  0.33   0.37
                  300        1.35  0.2     0.27  0.33   0.37
                  SoilCrop MungbeanSoil: LL=[0.32, 0.32, 0.32, 0.34, 0.32, 0.32, 0.3, 0.28, 0.28]; KL=[0.08, 0.08, 0.06, 0.04, 0.04, 0.08, 0.08, 0.08, 0.08]; XF=[1, 1, 1, 1, 1, 1, 1, 1, 1]
                Sample Initial: Thickness=[150, 150, 150, 150, 150, 150, 300, 300, 300]; SW=[0.48, 0.48, 0.48, 0.42, 0.37, 0.33, 0.325, 0.33, 0.33]; SWUnits=Volumetric; OCUnits=Total; PHUnits=Water
              Manager ClimateController
                AllowControl = True
                EnableDate = 01/01/1997 00:00:00
                WithinYearControl = False
                ControlStart =
                ControlEnd =
                RainfallMultiplier = 1
                RainfallAddition = 0
                RadiationMultiplier = 1
                RadiationAddition = 0
                MinTMultiplier = 1
                MinTAddition = 0
                MaxTMultiplier = 1
                MaxTAddition = 0
                WindMultiplier = 1
                WindAddition = 0
                VPMultiplier = 1
                VPAddition = 0
```csharp
using Newtonsoft.Json;
using APSIM.Shared.Utilities;
using Models.Interfaces;
using Models.Soils;
using Models.PMF;
using Models.Core;
using System.Xml.Serialization;
using System;
using Models.Soils.Nutrients;
using Models.Climate;

namespace Models
{
    [Serializable]
    public class Script : Model
    {
        // - Links to APSIM models
        [Link] Zone zone;
        [Link] Clock clock;
        [Link] Weather weather;
        [Link] ISummary summary = null;

        // - Paramters for this manager
        [Description("Enable? Set to 'No' to completely disable this manager")] public bool AllowControl { get; set; }

        [Separator("General settings")]
        [Description("Start the climate controls beginning on date (dd/mmm/yyyy): ")] public DateTime EnableDate { get; set; }
        [Description("Implement climate control only during part of the year?")] public bool WithinYearControl { get; set; }
        [Description("Within each year, the first day to start the climate controls is (dd-mmm)")] public string ControlStart { get; set; }
        [Description("Within each year, end last day of climate control is (dd-mmm)")] public string ControlEnd { get; set; }

        [Separator("Rainfall")]
        [Description("Rainfall multiplier (-): ")] public double RainfallMultiplier { get; set; }
        [Description("Rainfall addition (mm): ")] public double RainfallAddition { get; set; }

        [Separator("Radiation")]
        [Description("Radiation multiplier (-): ")] public double RadiationMultiplier { get; set; }
        [Description("Radiation addition (MJ/m2): ")] public double RadiationAddition { get; set; }

        [Separator("Minimum temperature")]
        [Description("Minimum temperature multiplier (-): ")] public double MinTMultiplier { get; set; }
        [Description("Minimum temperature addition (C): ")] public double MinTAddition { get; set; }

        [Separator("Maximum temperature")]
        [Description("Maximum temperature multiplier (-): ")] public double MaxTMultiplier { get; set; }
        [Description("Maximum temperature addition (C): ")] public double MaxTAddition { get; set; }

        [Separator("Wind speed")]
        [Description("Wind speed multiplier (-): ")] public double WindMultiplier { get; set; }
        [Description("Wind speed addition (m/s): ")] public double WindAddition { get; set; }

        [Separator("Vapour pressure")]
        [Description("Vapour pressure multiplier (-): ")] public double VPMultiplier { get; set; }
        [Description("Vapour pressure addition (hPa): ")] public double VPAddition { get; set; }

        [JsonIgnore] public bool DoControl { get; set; }
        [JsonIgnore] public int DoControlInt { get; set; }

        [EventSubscribe("PreparingNewWeatherData")] private void OnDoManagement(object sender, EventArgs e)
        {
            // Check if this manager is enabled
            if ((AllowControl) && (clock.Today >= EnableDate))
            {
                DoControl = true;
                if (WithinYearControl)
                    DoControl = DateUtilities.WithinDates(ControlStart, clock.Today, ControlEnd); 
            }

            if (DoControl)
                DoControlInt = 1;
            else
                DoControlInt = 0;

            if (DoControl)
            {
                // do the weather alterations 
                weather.Rain = RainfallMultiplier * weather.Rain + RainfallAddition;
                weather.Radn = RadiationMultiplier * weather.Radn + RadiationAddition;
                weather.MinT = MinTMultiplier * weather.MinT + MinTAddition;
                weather.MaxT = MaxTMultiplier * weather.MaxT + MaxTAddition;
                weather.Wind = WindMultiplier * weather.Wind + WindAddition;
                weather.VP = VPMultiplier * weather.VP + VPAddition;
            }
        }
    }
}
```
              MicroClimate: a_interception=0; b_interception=1; c_interception=0; d_interception=0; SoilHeatFluxFraction=0.4; MinimumHeightDiffForNewLayer=0; NightInterceptionFraction=0.5; ReferenceHeight=2
              Manager PartialIrr
                AutoIrrigationOn = False
                Crop = [Mungbean]
                FASWThreshold = 0.9
                FASWDepth = 600
                weeks = 5
                afterSowing = 50
                script: same as in Building Dataset.Calibration.Thomas Dissertation.exp1Berken.Exp1Berken.paddock.AutoIrr
        Experiment exp3
          Memo
            Experiment at Gatton, QLD, CSIRO Cooper field station. Soil type was a deep alluvial, weakly-cracking vertisol. There were 3 treatments: 1) well-watered, 2) rainfed and 3) stress with a rainout shelter for 4 weeks starting at different stages of mungbean growth imposed by having 3 sowing dates (3, 17, 30 December 1997). The cultivar used was Emerald.
          Factors
            Permutation
              Factor Sow
                CompositeFactor Dec3Irr
                  Specifications:
                    [SowingRule].Script.SowingDate=1997-12-3
                    [Operations]
                    [AutoIrr].Script.AutoIrrigationOn=False
                  Operations _
                    1997-12-04  [Irrigation].Apply(amount: 40)
                    1997-12-18  [Irrigation].Apply(amount: 20)
                    1998-01-02  [Irrigation].Apply(amount: 20)
                    1998-01-06  [Irrigation].Apply(amount: 25)
                    1998-01-13  [Irrigation].Apply(amount: 25)
                    1998-01-19  [Irrigation].Apply(amount: 30)
                    1998-01-27  [Irrigation].Apply(amount: 25)
                    1998-02-06  [Irrigation].Apply(amount: 20)
                    1998-02-27  [Irrigation].Apply(amount: 15)
                    1998-03-06  [Irrigation].Apply(amount: 33)
                    1998-03-13  [Irrigation].Apply(amount: 25)
                    1998-03-19  [Irrigation].Apply(amount: 20)
                    1998-03-27  [Irrigation].Apply(amount: 25)
                CompositeFactor Dec17Irr (disabled)
                  Specifications:
                    [SowingRule].Script.SowingDate=1997-12-17
                    [Operations]
                    [AutoIrr].Script.AutoIrrigationOn=True
                  Operations _
                    1997-12-18  [Irrigation].Apply(amount: 20)
                    1998-01-02  [Irrigation].Apply(amount: 20)
                    1998-01-06  [Irrigation].Apply(amount: 25)
                    1998-01-13  [Irrigation].Apply(amount: 25)
                    1998-01-19  [Irrigation].Apply(amount: 30)
                CompositeFactor Dec30Irr
                  Specifications:
                    [SowingRule].Script.SowingDate=1997-12-30
                    [Operations]
                    [AutoIrr].Script.AutoIrrigationOn=False
                  Operations _
                    1997-12-31  [Irrigation].Apply(amount: 25)
                    1998-01-02  [Irrigation].Apply(amount: 20)
                    1998-01-06  [Irrigation].Apply(amount: 25)
                    1998-01-13  [Irrigation].Apply(amount: 25)
                    1998-01-19  [Irrigation].Apply(amount: 30)
                    1998-01-27  [Irrigation].Apply(amount: 25)
                    1998-02-06  [Irrigation].Apply(amount: 20)
                    1998-02-27  [Irrigation].Apply(amount: 15)
                    1998-03-06  [Irrigation].Apply(amount: 33)
                    1998-03-13  [Irrigation].Apply(amount: 25)
                    1998-03-19  [Irrigation].Apply(amount: 20)
                    1998-03-27  [Irrigation].Apply(amount: 25)
                CompositeFactor Dec3RF
                  Specifications:
                    [SowingRule].Script.SowingDate=1997-12-3
                    [Operations]
                  Operations _
                    1997-12-04  [Irrigation].Apply(amount: 40)
                    1997-12-18  [Irrigation].Apply(amount: 40)
                    1998-01-02  [Irrigation].Apply(amount: 40)
                    1998-01-06  [Irrigation].Apply(amount: 25)
                    1998-01-13  [Irrigation].Apply(amount: 25)
                    1998-01-19  [Irrigation].Apply(amount: 30)
                CompositeFactor Dec17RF
                  Specifications:
                    [SowingRule].Script.SowingDate=1997-12-17
                    [Operations]
                  Operations _
                    1997-12-04  [Irrigation].Apply(amount: 40)
                    1997-12-18  [Irrigation].Apply(amount: 20)
                    1998-01-02  [Irrigation].Apply(amount: 20)
                    1998-01-06  [Irrigation].Apply(amount: 25)
                    1998-01-13  [Irrigation].Apply(amount: 25)
                    1998-01-19  [Irrigation].Apply(amount: 30)
                CompositeFactor Dec30RF
                  Specifications:
                    [SowingRule].Script.SowingDate=1997-12-30
                    [Operations]
                  Operations _
                    1997-12-04  [Irrigation].Apply(amount: 40)
                    1997-12-31  [Irrigation].Apply(amount: 25)
                    1998-01-02  [Irrigation].Apply(amount: 20)
                    1998-01-06  [Irrigation].Apply(amount: 25)
                    1998-01-13  [Irrigation].Apply(amount: 25)
                    1998-01-19  [Irrigation].Apply(amount: 30)
                CompositeFactor Dec3RO
                  Specifications:
                    [SowingRule].Script.SowingDate=1997-12-3
                    [Operations]
                    [ClimateController].Script.RainfallMultiplier=0.55
                    [ClimateController].Script.ControlStart = 24-Jan
                    [ClimateController].Script.ControlEnd = 21-Feb
                  Operations _
                    1997-12-04  [Irrigation].Apply(amount: 40)
                    1997-12-08  [Irrigation].Apply(amount: 20)
                    1997-12-12  [Irrigation].Apply(amount: 40)
                    1997-12-15  [Irrigation].Apply(amount: 20)
                    1997-12-18  [Irrigation].Apply(amount: 33)
                    1997-12-23  [Irrigation].Apply(amount: 20)
                    1998-02-22  [Irrigation].Apply(amount: 45)
                    1998-02-27  [Irrigation].Apply(amount: 55)
                    1998-03-04  [Irrigation].Apply(amount: 55)
                    1998-03-11  [Irrigation].Apply(amount: 55)
                    1998-03-18  [Irrigation].Apply(amount: 55)
                    1998-03-25  [Irrigation].Apply(amount: 55)
                CompositeFactor Dec17RO
                  Specifications:
                    [SowingRule].Script.SowingDate=1997-12-17
                    [Operations]
                    [ClimateController].Script.RainfallMultiplier=0.2
                    [ClimateController].Script.ControlStart = 24-Jan
                    [ClimateController].Script.ControlEnd = 21-Feb
                  Operations _
                    1997-12-18  [Irrigation].Apply(amount: 16)
                    1997-12-23  [Irrigation].Apply(amount: 20)
                    1997-12-26  [Irrigation].Apply(amount: 13)
                    1998-01-02  [Irrigation].Apply(amount: 20)
                    1998-01-06  [Irrigation].Apply(amount: 26)
                    1998-02-05  [Irrigation].Apply(amount: 30)
                    1998-02-06  [Irrigation].Apply(amount: 30)
                    1998-02-13  [Irrigation].Apply(amount: 35)
                    1998-02-27  [Irrigation].Apply(amount: 35)
                    1998-03-04  [Irrigation].Apply(amount: 35)
                    1998-03-11  [Irrigation].Apply(amount: 35)
                    1998-03-18  [Irrigation].Apply(amount: 35)
                    1998-03-25  [Irrigation].Apply(amount: 35)
                CompositeFactor Dec30RO
                  Specifications:
                    [SowingRule].Script.SowingDate=1997-12-30
                    [Operations]
                    [ClimateController].Script.RainfallMultiplier=0.3
                    [ClimateController].Script.ControlStart = 24-Jan
                    [ClimateController].Script.ControlEnd = 21-Feb
                  Operations _
                    1997-12-31  [Irrigation].Apply(amount: 17)
                    1998-01-01  [Irrigation].Apply(amount: 33)
                    1998-01-02  [Irrigation].Apply(amount: 30)
                    1998-01-06  [Irrigation].Apply(amount: 26)
                    1998-01-13  [Irrigation].Apply(amount: 13)
                    1998-01-19  [Irrigation].Apply(amount: 20)
                    1998-02-18  [Irrigation].Apply(amount: 30)
                    1998-02-19  [Irrigation].Apply(amount: 30)
                    1998-03-04  [Irrigation].Apply(amount: 25)
                    1998-03-11  [Irrigation].Apply(amount: 25)
                    1998-03-18  [Irrigation].Apply(amount: 25)
                    1998-03-25  [Irrigation].Apply(amount: 25)
              Factor Cultivar: Specification=[SowingRule].Script.CultivarName=Emerald
          Simulation exp3
            Summary summaryfile
            SoilArbitrator Soil Arbitrator
            Clock: Start=1997-12-01; End=1998-04-30
            Weather: FileName=GattonThomas.xlsx; ExcelWorkSheetName=Hermitage
            MicroClimate: a_interception=0; b_interception=1; c_interception=0; d_interception=0; SoilHeatFluxFraction=0.4; MinimumHeightDiffForNewLayer=0; NightInterceptionFraction=0.5; ReferenceHeight=2
            Zone paddock: Area=1; Slope=0; AspectAngle=0; Altitude=50
              Irrigation
              Fertiliser
              SurfaceOrganicMatter: InitialResidueName=wheat; InitialResidueType=wheat; InitialResidueMass=500; InitialStandingFraction=0; InitialCPR=0; InitialCNR=40
              Report DailyReport: same as Building Dataset.Calibration.Thomas Dissertation.exp1Berken.Exp1Berken.paddock.DailyReport
              Manager HarvestRule: same as Building Dataset.Calibration.Thomas Dissertation.exp1Berken.Exp1Berken.paddock.HarvestRule
              Report HarvestReport: same as Building Dataset.Calibration.Thomas Dissertation.exp1Berken.Exp1Berken.paddock.HarvestReport
              Plant Mungbean: ResourceName=Soybean
              Manager Irrigatefixeddates: same as Building Dataset.Calibration.Thomas Dissertation.exp1Berken.Exp1Berken.paddock.Irrigatefixeddates
              Operations
              Manager SowingRule
                CultivarName = Emerald
                RowSpacing = 400
                SowingDepth = 50
                SowingRate = 40
                SowingDate = 12/18/1997 00:00:00
                script: same as in Building Dataset.Calibration.Thomas Dissertation.exp1Berken.Exp1Berken.paddock.SowingRule
              Manager ClimateController: same as Building Dataset.Calibration.Thomas Dissertation.exp2.Exp2.paddock.ClimateController
              Soil: Latitude=0; Longitude=0
                WaterBalance SoilWater: same as Building Dataset.Calibration.Thomas Dissertation.exp1Emerald.Exp1Emerald.paddock.soil.SoilWater
                CERESSoilTemperature Temperature
                Organic: same as Building Dataset.Calibration.Thomas Dissertation.exp1Berken.Exp1Berken.paddock.soil.Organic
                Chemical: same as Building Dataset.Calibration.Thomas Dissertation.exp1Berken.Exp1Berken.paddock.soil.Chemical
                Nutrient
                Physical
                  Thickness  BD    AirDry  LL15  DUL   SAT
                  150        1.37  0.1     0.15  0.42  0.48
                  150        1.27  0.15    0.15  0.42  0.48
                  150        1.28  0.19    0.19  0.41  0.46
                  150        1.33  0.19    0.19  0.41  0.45
                  150        1.37  0.22    0.22  0.4   0.45
                  150        1.36  0.22    0.22  0.4   0.41
                  300        1.36  0.25    0.25  0.34  0.4
                  300        1.35  0.25    0.25  0.33  0.4
                  300        1.35  0.25    0.25  0.32  0.4
                  SoilCrop MungbeanSoil: LL=[0.15, 0.15, 0.25, 0.25, 0.32, 0.32, 0.29, 0.29, 0.31]; KL=[0.04, 0.04, 0.06, 0.06, 0.06, 0.06, 0.08, 0.08, 0.08]; XF=[1, 1, 1, 1, 1, 1, 1, 1, 1]
                Sample Initial: Thickness=[150, 150, 150, 150, 150, 150, 300, 300, 300]; SW=[0.15, 0.15, 0.32, 0.32, 0.34, 0.34, 0.29, 0.33, 0.32]; SWUnits=Volumetric; OCUnits=Total; PHUnits=Water
              Manager AutoIrr
                AutoIrrigationOn = False
                Crop = [Mungbean]
                FASWThreshold = 0.9
                FASWDepth = 600
                weeks = 1
                afterSowing = 20
                script: same as in Building Dataset.Calibration.Thomas Dissertation.exp1Berken.Exp1Berken.paddock.AutoIrr
        Experiment exp4
          Memo
            Experiment at Gatton, QLD, CSIRO Cooper field station. Soil type was a deep alluvial, weakly-cracking vertisol. There were 3 treatments: 1) well-watered, 2) rainfed and 3) rainfed+irrigated for first 3 weeks and at podfilling. The cultivar used was Emerald.
          Factors
            Permutation
              Factor Water
                CompositeFactor Irr: Specifications=[Operations]
                  Operations Irr
                    1998-02-16  [Irrigation].Apply(amount: 35)
                    1998-02-22  [Irrigation].Apply(amount: 35)
                    1998-03-01  [Irrigation].Apply(amount: 35)
                    1998-03-08  [Irrigation].Apply(amount: 35)
                    1998-03-15  [Irrigation].Apply(amount: 35)
                    1998-03-22  [Irrigation].Apply(amount: 35)
                    1998-03-29  [Irrigation].Apply(amount: 35)
                    1998-04-05  [Irrigation].Apply(amount: 35)
                    1998-04-12  [Irrigation].Apply(amount: 35)
                    1998-04-19  [Irrigation].Apply(amount: 35)
                    1998-04-26  [Irrigation].Apply(amount: 35)
                    1998-05-03  [Irrigation].Apply(amount: 35)
                    1998-05-10  [Irrigation].Apply(amount: 35)
                    1998-05-17  [Irrigation].Apply(amount: 35)
                    1998-05-24  [Irrigation].Apply(amount: 35)
                CompositeFactor RF
                  Specifications:
                    [Operations]
                  Operations RF
                    1998-02-16  [Irrigation].Apply(amount: 35)
                    1998-02-22  [Irrigation].Apply(amount: 35)
                    1998-03-01  [Irrigation].Apply(amount: 35)
                    1998-03-08  [Irrigation].Apply(amount: 35)
                CompositeFactor RF_Irr
                  Specifications:
                    [Operations]
                  Operations RF_Irr
                    1998-02-16  [Irrigation].Apply(amount: 35)
                    1998-02-22  [Irrigation].Apply(amount: 35)
                    1998-03-01  [Irrigation].Apply(amount: 35)
                    1998-03-08  [Irrigation].Apply(amount: 35)
                    1998-05-01  [Irrigation].Apply(amount: 20)
              Factor Cultivar: Specification=[SowingRule].Script.CultivarName=Emerald
          Simulation exp4
            Summary summaryfile
            SoilArbitrator Soil Arbitrator
            Clock: Start=1998-02-01; End=1998-06-30
            Weather: FileName=GattonThomas.xlsx; ExcelWorkSheetName=Hermitage
            Zone paddock: Area=1; Slope=0; AspectAngle=0; Altitude=50
              Irrigation
              Fertiliser
              SurfaceOrganicMatter: InitialResidueName=wheat; InitialResidueType=wheat; InitialResidueMass=500; InitialStandingFraction=0; InitialCPR=0; InitialCNR=40
              Report DailyReport: same as Building Dataset.Calibration.Thomas Dissertation.exp1Berken.Exp1Berken.paddock.DailyReport
              Manager HarvestRule: same as Building Dataset.Calibration.Thomas Dissertation.exp1Berken.Exp1Berken.paddock.HarvestRule
              Report HarvestReport: same as Building Dataset.Calibration.Thomas Dissertation.exp1Berken.Exp1Berken.paddock.HarvestReport
              Plant Mungbean: ResourceName=Soybean
              Manager Irrigatefixeddates: same as Building Dataset.Calibration.Thomas Dissertation.exp1Berken.Exp1Berken.paddock.Irrigatefixeddates
              Operations
              Manager SowingRule
                CultivarName = Emerald
                RowSpacing = 375
                SowingDepth = 50
                SowingRate = 40
                SowingDate = 02/16/1998 00:00:00
                script: same as in Building Dataset.Calibration.Thomas Dissertation.exp1Berken.Exp1Berken.paddock.SowingRule
              MicroClimate: a_interception=0; b_interception=1; c_interception=0; d_interception=0; SoilHeatFluxFraction=0.4; MinimumHeightDiffForNewLayer=0; NightInterceptionFraction=0.5; ReferenceHeight=2
              Manager AutoIrr
                AutoIrrigationOn = False
                Crop = [Mungbean]
                FASWThreshold = 0.9
                FASWDepth = 600
                weeks = 0
                afterSowing = 2
                script: same as in Building Dataset.Calibration.Thomas Dissertation.exp1Berken.Exp1Berken.paddock.AutoIrr
              Soil: Latitude=0; Longitude=0
                WaterBalance SoilWater: same as Building Dataset.Calibration.Thomas Dissertation.exp1Emerald.Exp1Emerald.paddock.soil.SoilWater
                CERESSoilTemperature Temperature
                Organic: same as Building Dataset.Calibration.Thomas Dissertation.exp1Berken.Exp1Berken.paddock.soil.Organic
                Chemical: same as Building Dataset.Calibration.Thomas Dissertation.exp1Berken.Exp1Berken.paddock.soil.Chemical
                Nutrient
                Physical
                  Thickness  BD    AirDry  LL15  DUL   SAT
                  150        1.37  0.1     0.15  0.38  0.42
                  150        1.27  0.15    0.15  0.38  0.42
                  150        1.28  0.19    0.19  0.38  0.42
                  150        1.33  0.19    0.19  0.38  0.42
                  150        1.37  0.22    0.22  0.38  0.42
                  150        1.36  0.22    0.22  0.38  0.41
                  300        1.36  0.25    0.25  0.34  0.4
                  300        1.35  0.25    0.25  0.33  0.4
                  300        1.35  0.25    0.25  0.32  0.4
                  SoilCrop MungbeanSoil: LL=[0.25, 0.28, 0.32, 0.32, 0.32, 0.32, 0.29, 0.29, 0.29]; KL=[0.08, 0.08, 0.08, 0.08, 0.08, 0.08, 0.08, 0.08, 0.08]; XF=[1, 1, 1, 1, 1, 1, 1, 1, 1]
                Sample Initial: Thickness=[150, 150, 150, 150, 150, 150, 300, 300, 300]; SW=[0.38, 0.38, 0.38, 0.38, 0.38, 0.38, 0.34, 0.33, 0.32]; SWUnits=Volumetric; OCUnits=Total; PHUnits=Water
                InitialWater Initial water: PercentMethod=0; FractionFull=1
      Folder TOS
        Memo TOS data description
          These trials took place in Gatton on a vertisol at the Gilbert Site 2018-2021 looking at 6 cultivars (Jade, Crystal, CeleraII, Opal, Onyx, Berken) planted at 5-6 times in rainfed and irrigated (one year). The data has not been published yet, but was collected and will be published by Kylie Wenham. Berken was likely not a pure seed and cannot be compared to the results of Thomas' dissertation. The first year of the experiment was excluded from the model dataset because the data was concluded to be unreliable.
        Experiment TOSyear2
          Factors
            Permutation
              Factor Sow
                CompositeFactor Oct19 (disabled)
                  Specifications:
                    [SowingRule].Script.SowingDate=2019-10-22
                    [AutoPart].Script.AutoIrrigationOn=True
                    [Operations]
                  Operations Irr
                    2019-10-28  [Irrigation].Apply(amount:24)
                    2019-11-04  [Irrigation].Apply(amount:23)
                    2019-11-14  [Irrigation].Apply(amount:17.5)
                    2019-11-29  [Irrigation].Apply(amount:14.7)
                    2019-12-04  [Irrigation].Apply(amount:18.6)
                    2019-12-12  [Irrigation].Apply(amount:24.2)
                    2019-12-19  [Irrigation].Apply(amount:20.2)
                    2019-10-28  [Irrigation].Apply(amount:14)
                    2019-11-04  [Irrigation].Apply(amount:13)
                    2019-12-04  [Irrigation].Apply(amount:18.6)
                    2019-12-19  [Irrigation].Apply(amount:10.2)
                CompositeFactor Oct19RF
                  Specifications:
                    [SowingRule].Script.SowingDate=2019-10-22
                    [AutoPart].Script.AutoIrrigationOn=True
                    [Operations]
                  Operations Irr
                    2019-10-28  [Irrigation].Apply(amount:24)
                    2019-11-04  [Irrigation].Apply(amount:23)
                    2019-12-04  [Irrigation].Apply(amount:28.6)
                    2019-12-19  [Irrigation].Apply(amount:30.2)
                CompositeFactor Nov19
                  Specifications:
                    [SowingRule].Script.SowingDate=2019-11-28
                    [Operations]
                    [AutoPart].Script.AutoIrrigationOn=True
                  Operations Irr
                    2019-11-29  [Irrigation].Apply(amount:24.7)
                    2019-12-04  [Irrigation].Apply(amount:38.6)
                    2019-12-12  [Irrigation].Apply(amount:34.2)
                    2019-12-23  [Irrigation].Apply(amount:34.3)
                    2019-12-31  [Irrigation].Apply(amount:24.2)
                    2020-01-06  [Irrigation].Apply(amount:24.9)
                    2020-01-14  [Irrigation].Apply(amount:24.3)
                CompositeFactor Nov19RF
                  Specifications:
                    [Operations]
                    [SowingRule].Script.SowingDate=2019-11-28
                  Operations Irr
                    2019-11-29  [Irrigation].Apply(amount:24.7)
                    2019-12-04  [Irrigation].Apply(amount:28.6)
                    2019-12-12  [Irrigation].Apply(amount:24.2)
                    2019-12-19  [Irrigation].Apply(amount:20.2)
                    2019-12-31  [Irrigation].Apply(amount:24.2)
                    2020-01-06  [Irrigation].Apply(amount:24.9)
                    2020-01-14  [Irrigation].Apply(amount:24.3)
                CompositeFactor Jan20
                  Specifications:
                    [SowingRule].Script.SowingDate=2020-1-14
                    [Soil].Initial Water.SW=0.208,0.273,0.286,0.286,0.286,0.286,0.286,0.286,0.286
                    [AutoIrr].Script.AutoIrrigationOn=True
                    [Operations]
                  Operations Irr
                    2020-01-16  [Irrigation].Apply(amount:24.5)
                CompositeFactor Jan20RF
                  Specifications:
                    [SowingRule].Script.SowingDate=2020-1-14
                    [AutoPart].Script.AutoIrrigationOn=True
                    [Operations]
                  Operations Irr
              Factor Cv: Specification=[SowingRule].Script.CultivarName=Jade,Crystal
          Simulation TOSyear2
            Summary summaryfile
            SoilArbitrator Soil Arbitrator
            Clock: Start=2019-10-01; End=2020-05-24
            Weather: FileName=GattonKylie.xlsx; ExcelWorkSheetName=Kylie
            Zone paddock: Area=1; Slope=0; AspectAngle=0; Altitude=50
              Irrigation
              Fertiliser
              SurfaceOrganicMatter: InitialResidueName=wheat; InitialResidueType=wheat; InitialResidueMass=500; InitialStandingFraction=0; InitialCPR=0; InitialCNR=40
              Report DailyReport: same as Building Dataset.Calibration.Thomas Dissertation.exp1Berken.Exp1Berken.paddock.DailyReport
              Manager HarvestRule: same as Building Dataset.Calibration.Thomas Dissertation.exp1Berken.Exp1Berken.paddock.HarvestRule
              Report HarvestReport: same as Building Dataset.Calibration.Thomas Dissertation.exp1Berken.Exp1Berken.paddock.HarvestReport
              Plant Mungbean: ResourceName=Soybean
              Manager Irrigatefixeddates: same as Building Dataset.Calibration.Thomas Dissertation.exp1Berken.Exp1Berken.paddock.Irrigatefixeddates
              Operations
              Manager SowingRule
                CultivarName = Emerald
                RowSpacing = 540
                SowingDepth = 30
                SowingRate = 30.8
                SowingDate = 11/28/1996 00:00:00
                script: same as in Building Dataset.Calibration.Thomas Dissertation.exp1Berken.Exp1Berken.paddock.SowingRule
              Manager AutoIrr
                AutoIrrigationOn = False
                Crop = [Mungbean]
                FASWThreshold = 0.9
                FASWDepth = 600
                weeks = 0
                afterSowing = 0
                script: same as in Building Dataset.Calibration.Thomas Dissertation.exp1Berken.Exp1Berken.paddock.AutoIrr
              MicroClimate: a_interception=0; b_interception=1; c_interception=0; d_interception=0; SoilHeatFluxFraction=0.4; MinimumHeightDiffForNewLayer=0; NightInterceptionFraction=0.5; ReferenceHeight=2
              Soil: SoilType=APS6Soil; LocalName=APS6Site; Site=APS6Site; NearestTown=Unknown; Region=Lawes; NaturalVegetation=Unknown; Latitude=0; Longitude=0
                WaterBalance SoilWater: SummerDate=1-Nov; SummerU=6; SummerCona=3.5; WinterDate=1-Apr; WinterU=6; WinterCona=3.5; DiffusConst=88; DiffusSlope=35.4; Salb=0.13; CN2Bare=60; CNRed=20; CNCov=0.8; DischargeWidth=0; CatchmentArea=0
                  Thickness  SWCON  KLAT
                  150        0.3    0
                  150        0.3    0
                  150        0.3    0
                  150        0.3    0
                  150        0.3    0
                  150        0.3    0
                  300        0.3    0
                  300        0.3    0
                  300        0.3    0
                Organic: FOMCNRatio=60
                  Thickness  Carbon  SoilCNRatio  FBiom  FInert  FOM
                  150        2.08    14.5         0.03   0.45    34.7129
                  150        1.21    14.5         0.02   0.6     27.0344
                  150        1.21    14.5         0.01   0.78    16.3972
                  150        1.15    14.5         0.01   0.78    16.397
                  150        1       14.5         0.01   0.9     9.945
                  150        1       14.5         0.01   0.9     9.945
                  300        0.8     14.5         0.01   0.99    6.032
                  300        0.45    14.5         0.01   0.99    3.659
                  300        0.45    14.5         0.01   0.99    2.219
                Chemical
                  Thickness  NO3N  NH4N  PH
                  150        10    3     7.5
                  150        5     2     8
                  150        3     1     8
                  150        3     1     8
                  150        2     0.8   8
                  150        2     0.8   8
                  300        1     0.8   8
                  300        0.1   0.5   8
                  300        0.1   0.5   8
                CERESSoilTemperature Temperature
                Nutrient
                Physical
                  Thickness  BD    AirDry  LL15    DUL   SAT
                  150        1.38  0.2     0.208   0.42  0.45
                  150        1.34  0.273   0.2731  0.42  0.45
                  150        1.35  0.286   0.2857  0.42  0.45
                  150        1.35  0.286   0.286   0.42  0.45
                  150        1.5   0.286   0.2863  0.4   0.43
                  150        1.5   0.286   0.286   0.4   0.43
                  300        1.49  0.286   0.286   0.36  0.4
                  300        1.46  0.286   0.286   0.36  0.4
                  300        1.46  0.286   0.286   0.36  0.4
                  SoilCrop MungbeanSoil
                    LL=[0.258, 0.273, 0.286, 0.286, 0.286, 0.286, 0.286, 0.286, 0.286]
                    KL=[0.08, 0.08, 0.06, 0.06, 0.06, 0.04, 0.02, 0.02, 0.01]
                    XF=[1, 1, 1, 1, 1, 1, 1, 1, 1]
                Sample Initial Water: SWUnits=Volumetric; OCUnits=Total; PHUnits=Water
                  Thickness  NO3  NH4  SW     PH
                  150        20   7    0.258  7.5
                  150        5    6    0.273  7.9
                  150        4    8    0.286  8.2
                  150        1    5    0.286  8.2
                  150        0.5  0.5  0.286  8.9
                  150        0.5  0.5  0.286  8
                  300        0.5  0.5  0.286  8
                  300        0.1  0.1  0.286  8
                  300        0.1  0.1  0.286  8
              Manager AutoPart
                AutoIrrigationOn = False
                Crop = [Mungbean]
                FASWThreshold = 0.9
                FASWDepth = 600
                weeks = 1
                afterSowing = 70
                script: same as in Building Dataset.Calibration.Thomas Dissertation.exp1Berken.Exp1Berken.paddock.AutoIrr
        Experiment TOSyear2Opal
          Factors
            Permutation
              Factor Sow
                CompositeFactor Irr (disabled)
                  Specifications:
                    [Operations]
                    [AutoIrr].Script.AutoIrrigationOn=True
                  Operations Irr
                    2020-01-16  [Irrigation].Apply(amount:34.5)
                    2020-02-16  [Irrigation].Apply(amount:24.5)
                    2020-03-16  [Irrigation].Apply(amount:24.5)
                CompositeFactor RF: Specifications=[Operations]
                  Operations Irr
                    2020-01-16  [Irrigation].Apply(amount:34.5)
                    2020-02-16  [Irrigation].Apply(amount:24.5)
                    2020-03-16  [Irrigation].Apply(amount:24.5)
              Factor Cv: Specification=[SowingRule].Script.CultivarName=Opal
          Simulation TOSyear2Opal
            Summary summaryfile
            SoilArbitrator Soil Arbitrator
            Clock: Start=2019-10-01; End=2020-05-24
            Weather: FileName=GattonKylie.xlsx; ExcelWorkSheetName=Kylie
            Zone paddock: Area=1; Slope=0; AspectAngle=0; Altitude=50
              Irrigation
              Fertiliser
              SurfaceOrganicMatter: InitialResidueName=wheat; InitialResidueType=wheat; InitialResidueMass=500; InitialStandingFraction=0; InitialCPR=0; InitialCNR=40
              Report DailyReport: same as Building Dataset.Calibration.Thomas Dissertation.exp1Berken.Exp1Berken.paddock.DailyReport
              Manager HarvestRule: same as Building Dataset.Calibration.Thomas Dissertation.exp1Berken.Exp1Berken.paddock.HarvestRule
              Report HarvestReport: same as Building Dataset.Calibration.Thomas Dissertation.exp1Berken.Exp1Berken.paddock.HarvestReport
              Plant Mungbean: ResourceName=Soybean
              Manager Irrigatefixeddates: same as Building Dataset.Calibration.Thomas Dissertation.exp1Berken.Exp1Berken.paddock.Irrigatefixeddates
              Operations
              Manager SowingRule
                CultivarName = Opal
                RowSpacing = 540
                SowingDepth = 30
                SowingRate = 30.8
                SowingDate = 01/14/2020 00:00:00
                script: same as in Building Dataset.Calibration.Thomas Dissertation.exp1Berken.Exp1Berken.paddock.SowingRule
              Manager AutoIrr: same as Building Dataset.Calibration.TOS.TOSyear2.TOSyear2.paddock.AutoIrr
              MicroClimate: a_interception=0; b_interception=1; c_interception=0; d_interception=0; SoilHeatFluxFraction=0.4; MinimumHeightDiffForNewLayer=0; NightInterceptionFraction=0.5; ReferenceHeight=2
              Soil: same as Building Dataset.Calibration.TOS.TOSyear2.TOSyear2.paddock.Soil
        Experiment TOSyear3
          Factors
            Permutation
              Factor Sow
                CompositeFactor Sept20
                  Specifications:
                    [SowingRule].Script.SowingDate=2020-9-9
                    [Soil].Initial Water.SW=0.208,0.273,0.306,0.306,0.306,0.3,0.310,0.330,0.330
                    [Operations]
                  Operations Irr
                    2020-09-10  [Irrigation].Apply(amount:18.5)
                    2020-09-17  [Irrigation].Apply(amount:17.5)
                    2020-09-30  [Irrigation].Apply(amount:19.5)
                    2020-10-09  [Irrigation].Apply(amount:21.5)
                    2020-11-24  [Irrigation].Apply(amount:17.5)
                CompositeFactor Oct20
                  Specifications:
                    [SowingRule].Script.SowingDate=2020-10-15
                    [Soil].Initial Water.SW=0.408,0.373,0.386,0.386,0.386,0.3,0.310,0.330,0.330
                    [Operations]
                    [AutoIrr].Script.AutoIrrigationOn=True
                  Operations Irr
                    2020-10-16  [Irrigation].Apply(amount:31.75)
                    2020-10-19  [Irrigation].Apply(amount:29.75)
                    2020-11-24  [Irrigation].Apply(amount:28.75)
                CompositeFactor Nov20
                  Specifications:
                    [SowingRule].Script.SowingDate=2020-11-24
                    [Soil].Initial Water.SW=0.308,0.373,0.386,0.386,0.386,0.3,0.310,0.330,0.330
                    [Operations]
                  Operations Irr
                    2020-11-24  [Irrigation].Apply(amount:9.75)
                CompositeFactor Jan21
                  Specifications:
                    [SowingRule].Script.SowingDate=2021-1-14
                    [Soil].Initial Water.SW=0.308,0.373,0.386,0.386,0.386,0.3,0.310,0.330,0.330
                    [Operations]
                  Operations Irr
                    2021-01-15  [Irrigation].Apply(amount:14.75)
                    2021-02-10  [Irrigation].Apply(amount:18.5)
                    2021-02-23  [Irrigation].Apply(amount:33.5)
                CompositeFactor Feb21
                  Specifications:
                    [SowingRule].Script.SowingDate=2021-02-22
                    [Soil].Initial Water.SW=0.308,0.373,0.386,0.386,0.386,0.3,0.310,0.330,0.330
                    [Operations]
                  Operations Irr
                    2021-01-15  [Irrigation].Apply(amount:14.75)
              Factor Cv
                Specification=[SowingRule].Script.CultivarName=Jade, CeleraII, Crystal, Opal, Onyx
          Simulation TOSyear3
            Summary summaryfile
            SoilArbitrator Soil Arbitrator
            Clock: Start=2020-09-01; End=2021-08-24
            Weather: FileName=GattKylAll.sim
            Zone paddock: Area=1; Slope=0; AspectAngle=0; Altitude=50
              Irrigation
              Fertiliser
              SurfaceOrganicMatter: InitialResidueName=wheat; InitialResidueType=wheat; InitialResidueMass=500; InitialStandingFraction=0; InitialCPR=0; InitialCNR=40
              Report DailyReport: same as Building Dataset.Calibration.Thomas Dissertation.exp1Berken.Exp1Berken.paddock.DailyReport
              Manager HarvestRule: same as Building Dataset.Calibration.Thomas Dissertation.exp1Berken.Exp1Berken.paddock.HarvestRule
              Report HarvestReport: same as Building Dataset.Calibration.Thomas Dissertation.exp1Berken.Exp1Berken.paddock.HarvestReport
              Plant Mungbean: ResourceName=Soybean
              Manager Irrigatefixeddates: same as Building Dataset.Calibration.Thomas Dissertation.exp1Berken.Exp1Berken.paddock.Irrigatefixeddates
              Operations
              Manager SowingRule: same as Building Dataset.Calibration.TOS.TOSyear2.TOSyear2.paddock.SowingRule
              Manager AutoIrr
                AutoIrrigationOn = True
                Crop = [Mungbean]
                FASWThreshold = 0.9
                FASWDepth = 600
                weeks = 3
                afterSowing = 20
                script: same as in Building Dataset.Calibration.Thomas Dissertation.exp1Berken.Exp1Berken.paddock.AutoIrr
              MicroClimate: a_interception=0; b_interception=1; c_interception=0; d_interception=0; SoilHeatFluxFraction=0.4; MinimumHeightDiffForNewLayer=0; NightInterceptionFraction=0.5; ReferenceHeight=2
              Soil: SoilType=APS6Soil; LocalName=APS6Site; Site=APS6Site; NearestTown=Unknown; Region=Lawes; NaturalVegetation=Unknown; Latitude=0; Longitude=0
                WaterBalance SoilWater: same as Building Dataset.Calibration.TOS.TOSyear2.TOSyear2.paddock.Soil.SoilWater
                Organic: same as Building Dataset.Calibration.TOS.TOSyear2.TOSyear2.paddock.Soil.Organic
                Chemical: same as Building Dataset.Calibration.TOS.TOSyear2.TOSyear2.paddock.Soil.Chemical
                CERESSoilTemperature Temperature
                Nutrient
                Physical
                  Thickness  BD    AirDry  LL15    DUL   SAT
                  150        1.38  0.2     0.208   0.42  0.45
                  150        1.34  0.273   0.2731  0.42  0.45
                  150        1.35  0.286   0.2857  0.42  0.45
                  150        1.35  0.286   0.286   0.42  0.45
                  150        1.5   0.286   0.2863  0.4   0.43
                  150        1.5   0.286   0.286   0.4   0.43
                  300        1.49  0.286   0.286   0.36  0.4
                  300        1.46  0.286   0.286   0.36  0.4
                  300        1.46  0.286   0.286   0.36  0.4
                  SoilCrop MungbeanSoil: LL=[0.3, 0.31, 0.32, 0.33, 0.33, 0.33, 0.33, 0.33, 0.33]; KL=[0.08, 0.08, 0.06, 0.06, 0.06, 0.04, 0.02, 0.02, 0.01]; XF=[1, 1, 1, 1, 1, 1, 1, 1, 1]
                Sample Initial Water: SWUnits=Volumetric; OCUnits=Total; PHUnits=Water
                  Thickness  NO3  NH4  SW    PH
                  150        20   7    0.32  7.5
                  150        5    6    0.32  7.9
                  150        4    8    0.32  8.2
                  150        1    5    0.32  8.2
                  150        0.5  0.5  0.38  8.9
                  150        0.5  0.5  0.38  8
                  300        0.5  0.5  0.36  8
                  300        0.1  0.1  0.36  8
                  300        0.1  0.1  0.36  8
      Folder Muchow
        Memo
          This dataset ([Muchow_etal_1993]) includes the cultvar "King" grown under irrigated conditions in a subtropical environment at the Gatton Research Station in southeastern Queensland, Australia and Kimberly, NT, Australia.  Plants were sampled almost weekly for biomass partitioning, nitrogen and plant development.
        Experiment KatherineJan28
          Factors
            Factor Water: Specification=[AutomaticIrrigation]
              Manager Irrigated
                AutoIrrigationOn = True
                FASWThreshold = 0.9
                FASWDepth = 1200
```csharp
using Models.Interfaces;
using APSIM.Shared.Utilities;
using System.Xml.Serialization;
using Models;
using Models.PMF;
using Models.Soils;
using System.Text;
using System.Collections.Generic;
using Models.Core;
using System;
using Models.Soils.Nutrients;

namespace Models
{
    [Serializable] 
    public class Script : Model
    {
        [Link] private Zone zone;
        [Link] private Irrigation irrigation;
        [Link] private Soil soil;
        [Link]
        private IPhysical soilPhysical;
        [Link]
        private ISoilWater waterBalance;
        public double FASW { get; set; }
        public double WaterDeficit  { get; set; }
    
        
        [Description("Auto irrigation on?")]
        public bool AutoIrrigationOn { get; set; }

        [Description("Threshold fraction available water (0-1)")]
        public double FASWThreshold { get; set; }

        [Description("Soil depth (mm) to which fraction available water is calculated")]
        public double FASWDepth { get; set; }

        [EventSubscribe("DoManagement")]
        private void OnDoManagement(object sender, EventArgs e)
        {
            CalculateFASW();
            if (AutoIrrigationOn)
            {
                if (FASW < FASWThreshold)
                {
                    double amount = 10;
                    irrigation.Apply(WaterDeficit, depth: 0);
                }
            }
        }
        
        private void CalculateFASW()
        {
            double[] LL15 = MathUtilities.Multiply(soilPhysical.LL15, soilPhysical.Thickness);
            double[] DUL = MathUtilities.Multiply(soilPhysical.DUL, soilPhysical.Thickness);
        
            int nlayr = GetLayerIndex();
            double cumdep = MathUtilities.Sum(soilPhysical.Thickness, 0, nlayr, 0.0);

            double excess_fr = MathUtilities.Divide((cumdep - FASWDepth), soilPhysical.Thickness[nlayr], 0.0);

            // note that results may be strange if swdep < ll15
            double avail_sw = (MathUtilities.Sum(waterBalance.SWmm, 0, nlayr, 0.0)
                              - excess_fr * waterBalance.SWmm[nlayr])
                              - (MathUtilities.Sum(LL15, 0, nlayr, 0.0)
                              - excess_fr * LL15[nlayr]);


            double pot_avail_sw = (MathUtilities.Sum(DUL, 0, nlayr, 0.0)
                                  - excess_fr * DUL[nlayr])
                                  - (MathUtilities.Sum(LL15, 0, nlayr, 0.0)
                                  - excess_fr * LL15[nlayr]);

            FASW = MathUtilities.Divide(avail_sw, pot_avail_sw, 0.0);
            WaterDeficit = MathUtilities.Constrain(pot_avail_sw - avail_sw, 0.0, 100000);
        }

        private int GetLayerIndex()
        {
            double[] cumThickness = soilPhysical.ThicknessCumulative;
            for (int i = 1; i < cumThickness.Length; i++)
            {
                if (FASWDepth < cumThickness[i])
                    return i - 1;
            }
            
            return cumThickness.Length - 1;
        }

    }
}
```
              Manager Rainfed (disabled)
                AutoIrrigationOn = False
                FASWThreshold = 0.7
                FASWDepth = 1200
                script: same as in Building Dataset.Calibration.Muchow.KatherineJan28.Factors.Water.Irrigated
          Simulation Jan28
            Clock: Start=1989-01-10; End=1989-05-31
            Summary summaryfile
            Weather: FileName=katherine1989.met
            SoilArbitrator Soil Arbitrator
            Zone paddock: Area=1; Slope=0; AspectAngle=0; Altitude=50
              MicroClimate: a_interception=0; b_interception=1; c_interception=0; d_interception=0; SoilHeatFluxFraction=0.4; MinimumHeightDiffForNewLayer=0; NightInterceptionFraction=0.5; ReferenceHeight=2
              Irrigation
              Manager AutomaticIrrigation
                AutoIrrigationOn = True
                FASWThreshold = 0.9
                FASWDepth = 900
                script: same as in Building Dataset.Calibration.Muchow.KatherineJan28.Factors.Water.Irrigated
              Fertiliser
              SurfaceOrganicMatter: InitialResidueName=maize; InitialResidueType=maize; InitialResidueMass=4500; InitialStandingFraction=0; InitialCPR=0; InitialCNR=55
              Manager SowingRule
                CultivarName = King
                RowSpacing = 500
                SowingDepth = 40
                SowingRate = 35
                SowingDate = 01/28/1989 00:00:00
                script: same as in Building Dataset.Calibration.Thomas Dissertation.exp1Berken.Exp1Berken.paddock.SowingRule
              Plant Mungbean: ResourceName=Soybean
              Soil: Latitude=0; Longitude=0
                Physical
                  Thickness  BD    AirDry  LL15  DUL   SAT
                  150        1.56  0.05    0.19  0.3   0.31
                  150        1.52  0.08    0.21  0.31  0.33
                  150        1.46  0.21    0.21  0.31  0.34
                  150        1.46  0.22    0.22  0.32  0.34
                  150        1.42  0.22    0.22  0.33  0.34
                  150        1.42  0.22    0.22  0.33  0.34
                  300        1.46  0.22    0.22  0.32  0.34
                  300        1.5   0.23    0.23  0.34  0.35
                  300        1.53  0.24    0.24  0.35  0.37
                  SoilCrop MungbeanSoil: LL=[0.19, 0.21, 0.21, 0.23, 0.23, 0.24, 0.25, 0.28, 0.28]; KL=[0.16, 0.16, 0.12, 0.1, 0.1, 0.08, 0.06, 0.04, 0.03]; XF=[1, 1, 1, 1, 1, 1, 1, 0, 0]
                WaterBalance SoilWater: SummerDate=1-Nov; SummerU=1.5; SummerCona=6.6; WinterDate=1-Apr; WinterU=1.5; WinterCona=6.6; DiffusConst=88; DiffusSlope=35.4; Salb=0.2; CN2Bare=70; CNRed=20; CNCov=0.8; DischargeWidth=0; CatchmentArea=0; Thickness=[150, 150, 150, 150, 150, 150, 300, 300, 300]; SWCON=[0.7, 0.7, 0.7, 0.7, 0.7, 0.7, 0.7, 0.7, 0.7]
                Organic: FOMCNRatio=36
                  Thickness  Carbon  SoilCNRatio  FBiom  FInert  FOM
                  150        1.27    14.5         0.04   0.39    518.782
                  150        0.59    14.5         0.02   0.47    404.028
                  150        0.34    14.5         0.01   0.52    314.657
                  150        0.34    14.5         0.01   0.62    245.055
                  150        0.26    14.5         0.01   0.74    190.849
                  150        0.26    14.5         0.01   0.83    148.634
                  300        0.25    14.5         0.01   0.93    90.1508
                  300        0.19    14.5         0.01   0.93    54.6792
                  300        0.21    14.5         0.01   0.93    33.1646
                Chemical
                  Thickness  NO3N  NH4N  PH
                  150        2     1     6.5
                  150        2     1     6.2
                  150        2     1     6.3
                  150        2     1     6.4
                  150        2     1     6.5
                  150        2     1     6.6
                  300        2     1     6.6
                  300        2     1     6.5
                  300        2     1     6.5
                Sample InitialSW: Thickness=[150, 150, 150, 150, 150, 150, 300, 300, 300]; SWUnits=Volumetric; OCUnits=Total; PHUnits=Water
                  SW=[0.304, 0.31, 0.31, 0.324, 0.328, 0.328, 0.325, 0.337, 0.35]
                CERESSoilTemperature Temperature
                Nutrient
              Manager HarvestRule: same as Building Dataset.Calibration.Thomas Dissertation.exp1Berken.Exp1Berken.paddock.HarvestRule
              Report DailyReport: same as Building Dataset.Calibration.Thomas Dissertation.exp1Berken.Exp1Berken.paddock.DailyReport
              Report HarvestReport: same as Building Dataset.Calibration.Thomas Dissertation.exp1Berken.Exp1Berken.paddock.HarvestReport
        Simulation GattonJan91990
          Clock: Start=1990-01-01; End=1990-05-31
          Summary summaryfile
          Weather: FileName=Gatton.met
          SoilArbitrator Soil Arbitrator
          Zone paddock: Area=1; Slope=0; AspectAngle=0; Altitude=50
            MicroClimate: a_interception=0; b_interception=1; c_interception=0; d_interception=0; SoilHeatFluxFraction=0.4; MinimumHeightDiffForNewLayer=0; NightInterceptionFraction=0.5; ReferenceHeight=2
            Irrigation
            Fertiliser
            SurfaceOrganicMatter: InitialResidueName=maize; InitialResidueType=maize; InitialResidueMass=100; InitialStandingFraction=0; InitialCPR=0; InitialCNR=55
            Report DailyReport: same as Building Dataset.Calibration.Thomas Dissertation.exp1Berken.Exp1Berken.paddock.DailyReport
            Manager SowingRule
              CultivarName = King
              RowSpacing = 200
              SowingDepth = 50
              SowingRate = 35
              SowingDate = 01/09/1990 00:00:00
              script: same as in Building Dataset.Calibration.Thomas Dissertation.exp1Berken.Exp1Berken.paddock.SowingRule
            Report HarvestReport: EventNames=[Soybean].Harvesting
              VariableNames:
                [Clock].Today
                [Mungbean].Structure.MainStemPrimordiaNo
                [Mungbean].Phenology.NFF
                [Mungbean].Script.FinalTag
            Soil: SoilType=APS6Soil; LocalName=APS6Site; Site=APS6Site; NearestTown=Unknown; Region=Lawes; NaturalVegetation=Unknown; Latitude=0; Longitude=0
              Physical
                Thickness  BD    AirDry  LL15  DUL   SAT
                150        1.38  0.1     0.2   0.38  0.43
                150        1.34  0.1     0.2   0.38  0.43
                150        1.35  0.1     0.22  0.4   0.43
                150        1.35  0.1     0.22  0.4   0.43
                150        1.5   0.1     0.18  0.4   0.43
                150        1.5   0.1     0.18  0.4   0.43
                300        1.49  0.1     0.14  0.39  0.42
                300        1.46  0.1     0.2   0.38  0.4
                300        1.46  0.1     0.2   0.38  0.4
                SoilCrop MungbeanSoil: LL=[0.2, 0.2, 0.22, 0.22, 0.18, 0.18, 0.14, 0.25, 0.28]; KL=[0.06, 0.05, 0.05, 0.05, 0.04, 0.04, 0.04, 0.04, 0.06]; XF=[1, 1, 1, 1, 1, 1, 1, 1, 1]
              WaterBalance SoilWater: same as Building Dataset.Calibration.TOS.TOSyear2.TOSyear2.paddock.Soil.SoilWater
              Organic: FOMCNRatio=60
                Thickness  Carbon  SoilCNRatio  FBiom  FInert  FOM
                150        2.2     14.5         0.03   0.45    34.7129
                150        1.6     14.5         0.02   0.6     27.0344
                150        1.15    14.5         0.01   0.78    16.3972
                150        1.15    14.5         0.01   0.78    16.397
                150        1       14.5         0.01   0.9     9.945
                150        1       14.5         0.01   0.9     9.945
                300        0.8     14.5         0.01   0.99    6.032
                300        0.45    14.5         0.01   0.99    3.659
                300        0.45    14.5         0.01   0.99    2.219
              Chemical: same as Building Dataset.Calibration.TOS.TOSyear2.TOSyear2.paddock.Soil.Chemical
              Sample Initial Water: Thickness=[150, 150, 150, 150, 150, 150, 300, 300, 300]; SWUnits=Volumetric; OCUnits=Total; PHUnits=Water
                SW=[0.326, 0.326, 0.346, 0.346, 0.333, 0.333, 0.315, 0.326, 0.326]
              CERESSoilTemperature Temperature
              Nutrient
            Manager HarvestRule: same as Building Dataset.Calibration.Thomas Dissertation.exp1Berken.Exp1Berken.paddock.HarvestRule
            Plant Mungbean: ResourceName=Soybean
            Manager AutoIrr
              AutoIrrigationOn = True
              Crop = [Mungbean]
              FASWThreshold = 0.9
              FASWDepth = 600
              weeks = 0
              afterSowing = 2
              script: same as in Building Dataset.Calibration.Thomas Dissertation.exp1Berken.Exp1Berken.paddock.AutoIrr
        Experiment Kimberly1980
          Factors
            Permutation
              Factor Dens: Specification=[SowingRule].Script.SowingRate=10,27,50
          Simulation Kimberly1980
            Clock: Start=1980-01-10; End=1980-05-31
            Summary summaryfile
            Weather: FileName=Kimberly1980.xlsx; ExcelWorkSheetName=Emerald
            SoilArbitrator Soil Arbitrator
            Zone paddock: Area=1; Slope=0; AspectAngle=0; Altitude=50
              MicroClimate: a_interception=0; b_interception=1; c_interception=0; d_interception=0; SoilHeatFluxFraction=0.4; MinimumHeightDiffForNewLayer=0; NightInterceptionFraction=0.5; ReferenceHeight=2
              Irrigation
              Manager AutomaticIrrigation
                AutoIrrigationOn = False
                FASWThreshold = 0.9
                FASWDepth = 900
                script: same as in Building Dataset.Calibration.Muchow.KatherineJan28.Factors.Water.Irrigated
              Fertiliser
              SurfaceOrganicMatter: InitialResidueName=maize; InitialResidueType=maize; InitialResidueMass=4500; InitialStandingFraction=0; InitialCPR=0; InitialCNR=55
              Manager SowingRule
                CultivarName = Berken
                RowSpacing = 250
                SowingDepth = 40
                SowingRate = 35
                SowingDate = 01/11/1980 00:00:00
                script: same as in Building Dataset.Calibration.Thomas Dissertation.exp1Berken.Exp1Berken.paddock.SowingRule
              Plant Mungbean: ResourceName=Soybean
              Manager HarvestRule: same as Building Dataset.Calibration.Thomas Dissertation.exp1Berken.Exp1Berken.paddock.HarvestRule
              Report DailyReport: same as Building Dataset.Calibration.Thomas Dissertation.exp1Berken.Exp1Berken.paddock.DailyReport
              Report HarvestReport: same as Building Dataset.Calibration.Thomas Dissertation.exp1Berken.Exp1Berken.paddock.HarvestReport
              Soil NT1_soil: Latitude=0; Longitude=0
                WaterBalance SoilWater: SummerDate=1-Nov; SummerU=1.5; SummerCona=6.6; WinterDate=1-Apr; WinterU=1.5; WinterCona=6.6; DiffusConst=88; DiffusSlope=35.4; Salb=0.2; CN2Bare=70; CNRed=20; CNCov=0.8; DischargeWidth=5; CatchmentArea=10; Thickness=[150, 150, 150, 150, 150, 150, 300, 300, 300]; SWCON=[0.7, 0.7, 0.7, 0.7, 0.7, 0.7, 0.7, 0.7, 0.7]
                CERESSoilTemperature Temperature
                Organic: FOMCNRatio=33
                  Thickness  Carbon  SoilCNRatio  FBiom  FInert  FOM
                  150        1.27    14.5         0.05   0.39    0
                  150        0.59    14.5         0.02   0.47    0
                  150        0.34    14.5         0.015  0.52    0
                  150        0.34    14.5         0.01   0.62    0
                  150        0.26    14.5         0.01   0.74    0
                  150        0.26    14.5         0.01   0.83    0
                  300        0.25    14.5         0.01   0.93    0
                  300        0.19    14.5         0.01   0.93    0
                  300        0.21    14.5         0.01   0.93    0
                Chemical
                  Thickness  NO3N  NH4N  PH
                  150        2     1     6.5
                  150        2     1     6.2
                  150        2     1     6.3
                  150        2     1     6.4
                  150        2     1     6.5
                  150        2     1     6.6
                  300        2     1     6.6
                  300        2     1     6.5
                  300        1     0.2   6.5
                Sample Initial conditions: Thickness=[150, 150, 150, 150, 150, 150, 300, 300, 300]; SWUnits=Volumetric; OCUnits=Total; PHUnits=Water
                  SW=[0.19, 0.21, 0.21, 0.223, 0.219, 0.219, 0.219, 0.229, 0.237]
                Nutrient
                Physical
                  Thickness  BD    AirDry  LL15   DUL    SAT
                  150        1.56  0.053   0.19   0.304  0.315
                  150        1.52  0.08    0.21   0.31   0.33
                  150        1.46  0.21    0.21   0.31   0.337
                  150        1.46  0.223   0.223  0.324  0.34
                  150        1.42  0.219   0.219  0.328  0.34
                  150        1.42  0.219   0.219  0.328  0.341
                  300        1.46  0.219   0.219  0.325  0.344
                  300        1.5   0.229   0.229  0.337  0.346
                  300        1.53  0.237   0.237  0.35   0.37
                  SoilCrop MungbeanSoil
                    LL=[0.19, 0.21, 0.21, 0.235, 0.233, 0.242, 0.248, 0.277, 0.285]
                    KL=[0.16, 0.16, 0.12, 0.1, 0.1, 0.08, 0.06, 0.04, 0.03]
                    XF=[1, 1, 1, 1, 1, 1, 1, 0, 0]
                InitialWater Initial water: PercentMethod=0; FractionFull=1
              Manager Automatic irrigation based on water deficit: same as Building Dataset.Calibration.Muchow.GattonJan91990.paddock.AutoIrr
      Simulation ExtraPhenSowOctCvJade
        Memo
          Additional small experiment at Gatton UQ field station on a vertisol. Sown on October 26, 2021. Node, leaf, and branch numbers were counted every week. After the 4th node, biomass samples were taken weekly too and partitioned into leaves and stems. Harvest data was not collected as the aim of the experiment was to nail down phenology.
        Summary summaryfile
        SoilArbitrator Soil Arbitrator
        Clock: Start=2021-10-01; End=2022-01-10
        Weather: FileName=GattonKylie.xlsx; ExcelWorkSheetName=Kylie
        Zone paddock: Area=1; Slope=0; AspectAngle=0; Altitude=50
          Irrigation
          Fertiliser
          SurfaceOrganicMatter: InitialResidueName=wheat; InitialResidueType=wheat; InitialResidueMass=500; InitialStandingFraction=0; InitialCPR=0; InitialCNR=40
          Report DailyReport: same as Building Dataset.Calibration.Thomas Dissertation.exp1Berken.Exp1Berken.paddock.DailyReport
          Manager HarvestRule: same as Building Dataset.Calibration.Thomas Dissertation.exp1Berken.Exp1Berken.paddock.HarvestRule
          Report HarvestReport: same as Building Dataset.Calibration.Thomas Dissertation.exp1Berken.Exp1Berken.paddock.HarvestReport
          Plant Mungbean: ResourceName=Soybean
          Operations
          Manager SowingRule
            CultivarName = Jade
            RowSpacing = 540
            SowingDepth = 30
            SowingRate = 30.8
            SowingDate = 10/26/2021 00:00:00
            script: same as in Building Dataset.Calibration.Thomas Dissertation.exp1Berken.Exp1Berken.paddock.SowingRule
          MicroClimate: a_interception=0; b_interception=1; c_interception=0; d_interception=0; SoilHeatFluxFraction=0.4; MinimumHeightDiffForNewLayer=0; NightInterceptionFraction=0.5; ReferenceHeight=2
          Soil: same as Building Dataset.Calibration.TOS.TOSyear2.TOSyear2.paddock.Soil
    Folder Validation
      Folder Mungbean_DAF
        Memo Mungbean_DAF data description
          These trials were done by DAF in 2019 and 2020, largely looking at the impact of applying N and innoculating seeds. Data is recorded in annual reports but not published. Jade was the cultivar used on all.
        Experiment ACRI
          Factors
            Permutation
              Factor N
                CompositeFactor 0N_Jade_rf: Specifications=[Operations]
                  Operations Irr
                    2020-01-23  [Fertiliser].Apply(Amount: 0, Type: Fertiliser.Types.UreaN, Depth: 150)
                    2020-01-23  [Mungbean].Sow(population: 25, cultivar: "Jade", depth: 50, rowSpacing: 500)
                CompositeFactor 0N_Opal_rf: Specifications=[Operations]
                  Operations Irr
                    2020-01-23  [Fertiliser].Apply(Amount: 0, Type: Fertiliser.Types.UreaN, Depth: 150)
                    2020-01-23  [Mungbean].Sow(population: 25, cultivar: "Opal", depth: 50, rowSpacing: 500)
          Simulation ACRI
            Clock: Start=2020-01-23; End=2020-05-08
            Summary summaryfile
            Weather: FileName=ACRI.xlsx; ExcelWorkSheetName=ACRI
            SoilArbitrator Soil Arbitrator
            Zone paddock: Area=1; Slope=0; AspectAngle=0; Altitude=50
              MicroClimate: a_interception=0; b_interception=1; c_interception=0; d_interception=0; SoilHeatFluxFraction=0; MinimumHeightDiffForNewLayer=0; NightInterceptionFraction=0; ReferenceHeight=2
              Irrigation
              Fertiliser
              SurfaceOrganicMatter: InitialResidueName=wheat; InitialResidueType=wheat; InitialResidueMass=500; InitialStandingFraction=0; InitialCPR=0; InitialCNR=40
              Report DailyReport: same as Building Dataset.Calibration.Thomas Dissertation.exp1Berken.Exp1Berken.paddock.DailyReport
              Manager SowingRule
                RowSpacing = 360
                SowingDepth = 40
                SowingRate = 35
                CultivarName = King
                SowingDate = 03/31/1980 00:00:00
                script: same as in Building Dataset.Calibration.Thomas Dissertation.exp1Berken.Exp1Berken.paddock.SowingRule
              Manager HarvestRule: same as Building Dataset.Calibration.Thomas Dissertation.exp1Berken.Exp1Berken.paddock.HarvestRule
              Report HarvestReport: same as Building Dataset.Calibration.Thomas Dissertation.exp1Berken.Exp1Berken.paddock.HarvestReport
              Plant Mungbean: ResourceName=Soybean
              Manager Irrigatefixeddates: same as Building Dataset.Calibration.Thomas Dissertation.exp1Berken.Exp1Berken.paddock.Irrigatefixeddates
              Operations
              Soil: Latitude=0; Longitude=0
                WaterBalance SoilWater: SummerDate=1-Nov; SummerU=6; SummerCona=3.5; WinterDate=1-Apr; WinterU=6; WinterCona=3.5; DiffusConst=88; DiffusSlope=35.4; Salb=0.13; CN2Bare=72; CNRed=20; CNCov=0.8; DischargeWidth=5; CatchmentArea=10; Thickness=[150, 150, 150, 150, 150, 150, 300, 300, 300]; SWCON=[0.366, 0.366, 0.351, 0.284, 0.26, 0.22, 0.22, 0.22, 0.22]
                CERESSoilTemperature Temperature
                Organic: FOMCNRatio=33
                  Thickness  Carbon  SoilCNRatio  FBiom  FInert  FOM
                  150        1.94    14.5         0.02   0.36    0
                  150        1.38    14.5         0.015  0.5     0
                  150        1       14.5         0.01   0.59    0
                  150        0.9     14.5         0.01   0.84    0
                  150        0.75    14.5         0.01   0.8     0
                  150        0.6     14.5         0.01   0.99    0
                  300        0.6     14.5         0.01   0.99    0
                  300        0.45    14.5         0.01   0.99    0
                  300        0.45    14.5         0.01   0.99    0
                Chemical
                  Thickness  NO3N  NH4N  PH
                  150        36    0     8
                  150        9     0     7.8
                  150        7     2     7.8
                  150        4     3     7.8
                  150        2     2     7.8
                  150        0.08  1     7.8
                  300        0.08  1     7.8
                  300        0.08  1     7.8
                  300        0.08  1     7.8
                Nutrient
                Physical
                  Thickness  BD    AirDry  LL15  DUL   SAT
                  150        1.31  0.05    0.21  0.43  0.48
                  150        1.26  0.21    0.21  0.44  0.49
                  150        1.36  0.21    0.21  0.41  0.46
                  150        1.39  0.21    0.21  0.41  0.45
                  150        1.44  0.21    0.21  0.41  0.43
                  150        1.45  0.21    0.21  0.4   0.42
                  300        1.45  0.2     0.2   0.35  0.39
                  300        1.46  0.19    0.19  0.35  0.36
                  300        1.46  0.18    0.18  0.32  0.35
                  SoilCrop MungbeanSoil: LL=[0.21, 0.21, 0.21, 0.21, 0.21, 0.21, 0.2, 0.19, 0.18]; KL=[0.08, 0.08, 0.08, 0.08, 0.08, 0.08, 0.08, 0.08, 0.08]; XF=[1, 1, 1, 1, 1, 1, 1, 1, 1]
                Sample Initial Water: Thickness=[150, 150, 150, 150, 150, 150, 300, 300, 300]; SW=[0.39, 0.36, 0.37, 0.37, 0.34, 0.32, 0.2, 0.2, 0.2]; SWUnits=Volumetric; OCUnits=Total; PHUnits=Water
              Manager AutoIrr: same as Building Dataset.Calibration.TOS.TOSyear2.TOSyear2.paddock.AutoIrr
          Memo
            ACRI trial in Narrabri with cultivars Opal and Jade. Detailed soil water measurements. Was supposed to be an N fertilizer trial, but not a priority in the model so we just looked at 0N rainfed.
        Simulation BreezaN0N
          Memo
            DAF trial on the Liverpool plains at the Liverpool Plains Research Station with cultivar Jade. Was supposed to be an N fertilizer trial, but not a priority in the model so we just looked at 0N.
          Clock: Start=2018-11-13; End=2019-06-16
          Summary summaryfile
          Weather: FileName=Breeza.xlsx; ExcelWorkSheetName=Breeza
          SoilArbitrator Soil Arbitrator
          Zone paddock: Area=1; Slope=0; AspectAngle=0; Altitude=50
            MicroClimate: a_interception=0; b_interception=1; c_interception=0; d_interception=0; SoilHeatFluxFraction=0; MinimumHeightDiffForNewLayer=0; NightInterceptionFraction=0; ReferenceHeight=2
            Irrigation
            Fertiliser
            SurfaceOrganicMatter: InitialResidueName=sorghum; InitialResidueType=sorghum; InitialResidueMass=5000; InitialStandingFraction=0; InitialCPR=0; InitialCNR=70
            Report DailyReport: same as Building Dataset.Calibration.Thomas Dissertation.exp1Berken.Exp1Berken.paddock.DailyReport
            Manager SowingRule
              RowSpacing = 360
              SowingDepth = 40
              SowingRate = 25
              CultivarName = Jade
              SowingDate = 01/09/2019 00:00:00
              script: same as in Building Dataset.Calibration.Thomas Dissertation.exp1Berken.Exp1Berken.paddock.SowingRule
            Manager HarvestRule: same as Building Dataset.Calibration.Thomas Dissertation.exp1Berken.Exp1Berken.paddock.HarvestRule
            Report HarvestReport: same as Building Dataset.Calibration.Thomas Dissertation.exp1Berken.Exp1Berken.paddock.HarvestReport
            Plant Mungbean: ResourceName=Soybean
            Operations
              2019-01-23  [Fertiliser].Apply(Amount: 0, Type: Fertiliser.Types.NH4N, Depth: 150)
              2019-01-04  [Irrigation].Apply(amount: 50)
              2019-02-26  [Irrigation].Apply(amount: 50)
              2019-03-01  [Irrigation].Apply(amount: 50)
              2019-03-15  [Irrigation].Apply(amount: 50)
              2019-03-28  [Irrigation].Apply(amount: 50)
            Soil: Latitude=0; Longitude=0
              WaterBalance SoilWater: SummerDate=1-Nov; SummerU=6; SummerCona=3.5; WinterDate=1-Apr; WinterU=6; WinterCona=3.5; DiffusConst=88; DiffusSlope=35.4; Salb=0.13; CN2Bare=72; CNRed=20; CNCov=0.8; DischargeWidth=5; CatchmentArea=10; Thickness=[150, 150, 150, 150, 150, 150, 300, 300, 300]
                SWCON=[0.526, 0.519, 0.531, 0.527, 0.52, 0.518, 0.511, 0.511, 0.511]
              CERESSoilTemperature Temperature
              Organic: FOMCNRatio=33
                Thickness  Carbon  SoilCNRatio  FBiom  FInert  FOM
                150        1.04    14.5         0.02   0.36    0
                150        0.79    14.5         0.015  0.5     0
                150        0.71    14.5         0.01   0.59    0
                150        0.52    14.5         0.01   0.84    0
                150        0.29    14.5         0.01   0.8     0
                150        0.3     14.5         0.01   0.99    0
                300        0.23    14.5         0.01   0.99    0
                300        0.23    14.5         0.01   0.99    0
                300        0.23    14.5         0.01   0.99    0
              Chemical: same as Building Dataset.Validation.Mungbean_DAF.ACRI.ACRI.paddock.soil.Chemical
              Nutrient
              Physical
                Thickness  BD     AirDry  LL15   DUL   SAT
                150        1.043  0.15    0.16   0.41  0.526
                150        1.063  0.28    0.28   0.5   0.519
                150        1.03   0.3     0.3    0.5   0.531
                150        1.042  0.354   0.354  0.51  0.527
                150        1.06   0.354   0.354  0.5   0.52
                150        1.065  0.354   0.354  0.48  0.518
                300        1.065  0.354   0.354  0.44  0.518
                300        1.084  0.354   0.354  0.44  0.511
                300        1.084  0.354   0.354  0.4   0.511
                SoilCrop MungbeanSoil: LL=[0.16, 0.28, 0.35, 0.354, 0.37, 0.37, 0.37, 0.37, 0.354]; KL=[0.08, 0.08, 0.08, 0.08, 0.08, 0.08, 0.08, 0.08, 0.08]; XF=[1, 1, 1, 1, 1, 1, 1, 1, 1]
              Sample Initial conditions: Thickness=[150, 150, 150, 150, 150, 150, 300, 300, 300]; SW=[0.41, 0.519, 0.531, 0.527, 0.52, 0.48, 0.44, 0.42, 0.4]; SWUnits=Volumetric; OCUnits=Total; PHUnits=Water
            Manager AutoIrr
              AutoIrrigationOn = True
              Crop = [Mungbean]
              FASWThreshold = 0.9
              FASWDepth = 900
              weeks = 1
              afterSowing = 0
              script: same as in Building Dataset.Calibration.Thomas Dissertation.exp1Berken.Exp1Berken.paddock.AutoIrr
        Simulation Emerald2019N0N
          Memo
            DAF trial in Emerald, QLD with cultivar Jade. Was supposed to be an N fertilizer trial, but not a priority in the model so we just looked at 0N.
          Clock: Start=2018-11-13; End=2019-08-16
          Summary summaryfile
          Weather: FileName=Emerald2009_2020.xlsx; ExcelWorkSheetName=Emerald
          SoilArbitrator Soil Arbitrator
          Zone paddock: Area=1; Slope=0; AspectAngle=0; Altitude=50
            MicroClimate: a_interception=0; b_interception=1; c_interception=0; d_interception=0; SoilHeatFluxFraction=0; MinimumHeightDiffForNewLayer=0; NightInterceptionFraction=0; ReferenceHeight=2
            Irrigation
            Fertiliser
            SurfaceOrganicMatter: InitialResidueName=sorghum; InitialResidueType=sorghum; InitialResidueMass=5000; InitialStandingFraction=0; InitialCPR=0; InitialCNR=70
            Report DailyReport: same as Building Dataset.Calibration.Thomas Dissertation.exp1Berken.Exp1Berken.paddock.DailyReport
            Manager SowingRule
              CultivarName = Jade
              RowSpacing = 360
              SowingDepth = 40
              SowingRate = 21
              SowingDate = 02/25/2019 00:00:00
              script: same as in Building Dataset.Calibration.Thomas Dissertation.exp1Berken.Exp1Berken.paddock.SowingRule
            Manager HarvestRule: same as Building Dataset.Calibration.Thomas Dissertation.exp1Berken.Exp1Berken.paddock.HarvestRule
            Report HarvestReport: same as Building Dataset.Calibration.Thomas Dissertation.exp1Berken.Exp1Berken.paddock.HarvestReport
            Plant Mungbean: ResourceName=Soybean
            Operations
              2018-11-07  [Irrigation].Apply(amount: 75)
              2019-02-25  [Irrigation].Apply(amount: 75)
            Soil: Latitude=0; Longitude=0
              WaterBalance SoilWater: SummerDate=1-Nov; SummerU=6; SummerCona=3.5; WinterDate=1-Apr; WinterU=6; WinterCona=3.5; DiffusConst=88; DiffusSlope=35.4; Salb=0.13; CN2Bare=72; CNRed=20; CNCov=0.8; DischargeWidth=5; CatchmentArea=10; Thickness=[150, 150, 150, 150, 150, 150, 300, 300, 300]
                SWCON=[0.384, 0.379, 0.353, 0.365, 0.387, 0.401, 0.396, 0.396, 0.396]
              CERESSoilTemperature Temperature
              Organic: FOMCNRatio=33
                Thickness  Carbon  SoilCNRatio  FBiom  FInert  FOM
                150        1.24    14.5         0.02   0.36    0
                150        1.24    14.5         0.015  0.5     0
                150        1.25    14.5         0.01   0.59    0
                150        1.1     14.5         0.01   0.84    0
                150        0.71    14.5         0.01   0.8     0
                150        0.34    14.5         0.01   0.99    0
                300        0.34    14.5         0.01   0.99    0
                300        0.34    14.5         0.01   0.99    0
                300        0.34    14.5         0.01   0.99    0
              Chemical: same as Building Dataset.Validation.Mungbean_DAF.ACRI.ACRI.paddock.soil.Chemical
              Nutrient
              Physical
                Thickness  BD     AirDry  LL15   DUL    SAT
                150        1.422  0.05    0.124  0.384  0.463
                150        1.431  0.148   0.148  0.379  0.46
                150        1.46   0.153   0.153  0.353  0.449
                150        1.44   0.153   0.153  0.365  0.449
                150        1.416  0.153   0.153  0.387  0.449
                150        1.394  0.153   0.153  0.401  0.449
                300        1.394  0.153   0.153  0.401  0.449
                300        1.407  0.153   0.153  0.396  0.449
                300        1.407  0.153   0.153  0.396  0.449
                SoilCrop MungbeanSoil
                  LL=[0.124, 0.148, 0.153, 0.153, 0.153, 0.153, 0.153, 0.153, 0.153]
                  KL=[0.08, 0.08, 0.08, 0.08, 0.08, 0.08, 0.08, 0.08, 0.08]
                  XF=[1, 1, 1, 1, 1, 1, 1, 1, 1]
              Sample Initial conditions: Thickness=[150, 150, 150, 150, 150, 150, 300, 300, 300]; SWUnits=Volumetric; OCUnits=Total; PHUnits=Water
                SW=[0.384, 0.379, 0.353, 0.365, 0.387, 0.401, 0.401, 0.396, 0.396]
            Manager AutoIrr
              Crop = [Mungbean]
              AutoIrrigationOn = True
              FASWThreshold = 0.9
              FASWDepth = 900
              weeks = 1
              afterSowing = 0
              script: same as in Building Dataset.Calibration.Thomas Dissertation.exp1Berken.Exp1Berken.paddock.AutoIrr
        Experiment Emerald2020
          Factors
            Permutation
              Factor N
                CompositeFactor 0N_irr
                  Specifications:
                    [Operations]
                    [AutoIrr].Script.AutoIrrigationOn=True
                  Operations Irr
                    2019-12-16  [Irrigation].Apply(amount: 100)
                    2020-02-17  [Fertiliser].Apply(Amount: 0, Type: Fertiliser.Types.UreaN, Depth: 150)
                CompositeFactor 0N_rf: Specifications=[Operations]
                  Operations Irr
                    2019-12-16  [Irrigation].Apply(amount: 100)
          Simulation Emerald2020
            Clock: Start=2020-01-01; End=2020-06-16
            Summary summaryfile
            Weather: FileName=Emerald2009_2020.xlsx; ExcelWorkSheetName=Emerald
            SoilArbitrator Soil Arbitrator
            Zone paddock: Area=1; Slope=0; AspectAngle=0; Altitude=50
              MicroClimate: a_interception=0; b_interception=1; c_interception=0; d_interception=0; SoilHeatFluxFraction=0; MinimumHeightDiffForNewLayer=0; NightInterceptionFraction=0; ReferenceHeight=2
              Irrigation
              Fertiliser
              SurfaceOrganicMatter: InitialResidueName=wheat; InitialResidueType=wheat; InitialResidueMass=500; InitialStandingFraction=0; InitialCPR=0; InitialCNR=40
              Report DailyReport: same as Building Dataset.Calibration.Thomas Dissertation.exp1Berken.Exp1Berken.paddock.DailyReport
              Manager SowingRule
                CultivarName = Jade
                RowSpacing = 360
                SowingDepth = 40
                SowingRate = 30
                SowingDate = 02/17/2020 00:00:00
                script: same as in Building Dataset.Calibration.Thomas Dissertation.exp1Berken.Exp1Berken.paddock.SowingRule
              Manager HarvestRule: same as Building Dataset.Calibration.Thomas Dissertation.exp1Berken.Exp1Berken.paddock.HarvestRule
              Report HarvestReport: same as Building Dataset.Calibration.Thomas Dissertation.exp1Berken.Exp1Berken.paddock.HarvestReport
              Plant Mungbean: ResourceName=Soybean
              Operations
              Soil: Latitude=0; Longitude=0
                WaterBalance SoilWater: SummerDate=1-Nov; SummerU=6; SummerCona=3.5; WinterDate=1-Apr; WinterU=6; WinterCona=3.5; DiffusConst=88; DiffusSlope=35.4; Salb=0.13; CN2Bare=72; CNRed=20; CNCov=0.8; DischargeWidth=5; CatchmentArea=10; Thickness=[150, 150, 150, 150, 150, 150, 300, 300, 300]
                  SWCON=[0.384, 0.379, 0.353, 0.365, 0.387, 0.401, 0.396, 0.401, 0.396]
                CERESSoilTemperature Temperature
                Organic: same as Building Dataset.Validation.Mungbean_DAF.Emerald2019N0N.paddock.soil.Organic
                Chemical
                  Thickness  NO3N  NH4N  PH
                  150        5     0     8
                  150        5     0     7.8
                  150        5     2     7.8
                  150        4     3     7.8
                  150        2     2     7.8
                  150        2     2     7.8
                  300        2     2     7.8
                  300        0.08  1     7.8
                  300        0.08  1     7.8
                Nutrient
                Physical
                  Thickness  BD     AirDry  LL15   DUL  SAT
                  150        1.422  0.05    0.124  0.3  0.35
                  150        1.431  0.148   0.148  0.3  0.35
                  150        1.46   0.153   0.153  0.3  0.35
                  150        1.44   0.16    0.16   0.3  0.35
                  150        1.416  0.17    0.17   0.3  0.35
                  150        1.394  0.18    0.18   0.3  0.35
                  300        1.407  0.19    0.19   0.3  0.35
                  300        1.394  0.2     0.2    0.3  0.35
                  300        1.407  0.2     0.2    0.3  0.35
                  SoilCrop MungbeanSoil: LL=[0.124, 0.148, 0.153, 0.16, 0.17, 0.18, 0.19, 0.2, 0.2]; KL=[0.08, 0.08, 0.08, 0.08, 0.08, 0.08, 0.08, 0.08, 0.08]; XF=[1, 1, 1, 1, 1, 1, 1, 1, 1]
                Sample Initial conditions: Thickness=[150, 150, 150, 150, 150, 150, 300, 300, 300]; SW=[0.3, 0.3, 0.3, 0.3, 0.3, 0.3, 0.3, 0.3, 0.3]; SWUnits=Volumetric; OCUnits=Total; PHUnits=Water
              Manager AutoIrr
                AutoIrrigationOn = False
                Crop = [Mungbean]
                FASWThreshold = 0.9
                FASWDepth = 900
                weeks = 3
                afterSowing = 20
                script: same as in Building Dataset.Calibration.Thomas Dissertation.exp1Berken.Exp1Berken.paddock.AutoIrr
          Memo
            DAF trial in Emerald, QLD with cultivar Jade. Was supposed to be an N fertilizer trial, but not a priority in the model so we just looked at 0N.
        Experiment HopelandSpring
          Memo
            DAF trial in Hopeland, QLD with cultivar Jade planted in Spring. Was supposed to be an N fertilizer trial, but not a priority in the model so we just looked at 0N.
          Factors
            Permutation
              Factor N: Specification=[Operations]
                CompositeFactor 0N_rf
                  Specifications:
                    [Operations]
                    [AutoIrr].Script.AutoIrrigationOn=False
                  Operations Irr
                    2019-10-14  [Fertiliser].Apply(Amount: 3.6, Type: Fertiliser.Types.UreaN, Depth: 150)
                CompositeFactor 0N_irr
                  Specifications:
                    [Operations]
                    [AutoIrr].Script.AutoIrrigationOn=True
                  Operations Irr
                    2019-10-14  [Fertiliser].Apply(Amount: 0, Type: Fertiliser.Types.UreaN, Depth: 150)
                    2019-11-20  [Irrigation].Apply(amount: 100)
                    2019-12-11  [Irrigation].Apply(amount: 100)
                    2019-12-12  [Irrigation].Apply(amount: 100)
                    2019-10-14  [Fertiliser].Apply(Amount: 3.6, Type: Fertiliser.Types.UreaN, Depth: 150)
          Simulation HopelandSpring
            Clock: Start=2019-10-14; End=2020-01-28
            Summary summaryfile
            Weather: FileName=Hopeland.xlsx; ExcelWorkSheetName=Hopeland
            SoilArbitrator Soil Arbitrator
            Zone paddock: Area=1; Slope=0; AspectAngle=0; Altitude=50
              MicroClimate: a_interception=0; b_interception=1; c_interception=0; d_interception=0; SoilHeatFluxFraction=0; MinimumHeightDiffForNewLayer=0; NightInterceptionFraction=0; ReferenceHeight=2
              Irrigation
              Fertiliser
              SurfaceOrganicMatter: InitialResidueName=wheat; InitialResidueType=wheat; InitialResidueMass=500; InitialStandingFraction=0; InitialCPR=0; InitialCNR=40
              Report DailyReport: same as Building Dataset.Calibration.Thomas Dissertation.exp1Berken.Exp1Berken.paddock.DailyReport
              Manager SowingRule
                RowSpacing = 500
                SowingDepth = 40
                SowingRate = 30
                CultivarName = Jade
                SowingDate = 10/14/2019 00:00:00
                script: same as in Building Dataset.Calibration.Thomas Dissertation.exp1Berken.Exp1Berken.paddock.SowingRule
              Manager HarvestRule: same as Building Dataset.Calibration.Thomas Dissertation.exp1Berken.Exp1Berken.paddock.HarvestRule
              Report HarvestReport: same as Building Dataset.Calibration.Thomas Dissertation.exp1Berken.Exp1Berken.paddock.HarvestReport
              Plant Mungbean: ResourceName=Soybean
              Operations
              Soil: Latitude=0; Longitude=0
                WaterBalance SoilWater: SummerDate=1-Nov; SummerU=6; SummerCona=3.5; WinterDate=1-Apr; WinterU=6; WinterCona=3.5; DiffusConst=88; DiffusSlope=35.4; Salb=0.13; CN2Bare=72; CNRed=20; CNCov=0.8; DischargeWidth=5; CatchmentArea=10; Thickness=[150, 150, 150, 150, 300, 300, 300, 300, 300]
                  SWCON=[0.308729, 0.322907, 0.32296, 0.297662, 0.298, 0.298, 0.298, 0.298, 0.298]
                CERESSoilTemperature Temperature
                Organic: FOMCNRatio=33
                  Thickness  Carbon  SoilCNRatio  FBiom  FInert  FOM
                  150        1.94    14.5         0.02   0.36    0
                  150        1.94    14.5         0.02   0.36    0
                  150        1.38    14.5         0.015  0.5     0
                  150        1       14.5         0.01   0.59    0
                  150        1       14.5         0.01   0.59    0
                  150        1       14.5         0.01   0.59    0
                  300        0.9     14.5         0.01   0.84    0
                  300        0.9     14.5         0.01   0.84    0
                  300        0.9     14.5         0.01   0.84    0
                Chemical
                  Thickness  NO3N  NH4N  PH
                  150        36    0     8
                  150        36    0     8
                  150        36    0     8
                  150        36    0     8
                  150        9     0     7.8
                  150        9     0     7.8
                  300        7     2     7.8
                  300        7     2     7.8
                  300        4     3     7.8
                Nutrient
                Physical
                  Thickness  BD    AirDry  LL15  DUL       SAT
                  150        1.45  0.05    0.2   0.308729  0.4
                  150        1.45  0.05    0.2   0.309     0.4
                  150        1.45  0.19    0.19  0.32296   0.4
                  150        1.45  0.19    0.19  0.323     0.4
                  150        1.45  0.24    0.24  0.323     0.37
                  150        1.45  0.24    0.24  0.323     0.37
                  300        1.45  0.24    0.24  0.298     0.35
                  300        1.45  0.24    0.24  0.298     0.35
                  300        1.45  0.24    0.24  0.298     0.35
                  SoilCrop MungbeanSoil: LL=[0.2, 0.2, 0.19, 0.19, 0.24, 0.24, 0.24, 0.24, 0.24]; KL=[0.08, 0.08, 0.08, 0.08, 0.08, 0.08, 0.08, 0.08, 0.08]; XF=[1, 1, 1, 1, 1, 1, 1, 1, 1]
                Sample Initial conditions: Thickness=[150, 150, 150, 150, 150, 150, 300, 300, 300]; SWUnits=Volumetric; OCUnits=Total; PHUnits=Water
                  SW=[0.309, 0.309, 0.323, 0.323, 0.323, 0.323, 0.323, 0.298, 0.298]
                InitialWater Initial water: PercentMethod=0; FractionFull=1
              Manager AutoIrr
                Crop = [Mungbean]
                AutoIrrigationOn = False
                FASWThreshold = 0.9
                FASWDepth = 900
                weeks = 0
                afterSowing = 0
                script: same as in Building Dataset.Calibration.Thomas Dissertation.exp1Berken.Exp1Berken.paddock.AutoIrr
        Experiment HopelandSummer
          Factors
            Permutation
              Factor N: Specification=[Operations]
                Operations 0N_rf
                  2020-01-29  [Fertiliser].Apply(Amount: 3.6, Type: Fertiliser.Types.NO3N, Depth: 150)
                Operations 0N_irr
                  2020-03-20  [Irrigation].Apply(amount: 200)
                  2020-01-29  [Fertiliser].Apply(Amount: 3.6, Type: Fertiliser.Types.NO3N, Depth: 150)
          Simulation HopelandSummer
            Clock: Start=2020-01-08; End=2020-08-18
            Summary summaryfile
            Weather: FileName=Hopeland.xlsx; ExcelWorkSheetName=Hopeland
            SoilArbitrator Soil Arbitrator
            Zone paddock: Area=1; Slope=0; AspectAngle=0; Altitude=50
              MicroClimate: a_interception=0; b_interception=1; c_interception=0; d_interception=0; SoilHeatFluxFraction=0; MinimumHeightDiffForNewLayer=0; NightInterceptionFraction=0; ReferenceHeight=2
              Irrigation
              Fertiliser
              SurfaceOrganicMatter: InitialResidueName=wheat; InitialResidueType=wheat; InitialResidueMass=500; InitialStandingFraction=0; InitialCPR=0; InitialCNR=40
              Report DailyReport: same as Building Dataset.Calibration.Thomas Dissertation.exp1Berken.Exp1Berken.paddock.DailyReport
              Manager SowingRule
                RowSpacing = 500
                SowingDepth = 40
                SowingRate = 30
                CultivarName = Jade
                SowingDate = 01/29/2020 00:00:00
                script: same as in Building Dataset.Calibration.Thomas Dissertation.exp1Berken.Exp1Berken.paddock.SowingRule
              Manager HarvestRule: same as Building Dataset.Calibration.Thomas Dissertation.exp1Berken.Exp1Berken.paddock.HarvestRule
              Report HarvestReport: same as Building Dataset.Calibration.Thomas Dissertation.exp1Berken.Exp1Berken.paddock.HarvestReport
              Plant Mungbean: ResourceName=Soybean
              Operations
              Soil: Latitude=0; Longitude=0
                WaterBalance SoilWater: same as Building Dataset.Validation.Mungbean_DAF.HopelandSpring.HopelandSpring.paddock.soil.SoilWater
                CERESSoilTemperature Temperature
                Organic: same as Building Dataset.Validation.Mungbean_DAF.HopelandSpring.HopelandSpring.paddock.soil.Organic
                Chemical: same as Building Dataset.Validation.Mungbean_DAF.HopelandSpring.HopelandSpring.paddock.soil.Chemical
                Nutrient
                Physical
                  Thickness  BD    AirDry  LL15  DUL       SAT
                  150        1.45  0.05    0.2   0.308729  0.4
                  150        1.45  0.05    0.2   0.309     0.4
                  150        1.45  0.19    0.19  0.32296   0.4
                  150        1.45  0.19    0.19  0.323     0.4
                  150        1.45  0.24    0.24  0.323     0.37
                  150        1.45  0.24    0.24  0.323     0.37
                  300        1.45  0.27    0.27  0.298     0.35
                  300        1.45  0.27    0.27  0.298     0.35
                  300        1.45  0.27    0.27  0.298     0.35
                  SoilCrop MungbeanSoil: LL=[0.2, 0.2, 0.19, 0.19, 0.24, 0.24, 0.27, 0.27, 0.27]; KL=[0.08, 0.08, 0.08, 0.08, 0.08, 0.08, 0.08, 0.08, 0.08]; XF=[1, 1, 1, 1, 1, 1, 1, 1, 1]
                Sample Initial conditions: same as Building Dataset.Validation.Mungbean_DAF.HopelandSpring.HopelandSpring.paddock.soil.Initial conditions
                InitialWater Initial water: PercentMethod=0; FractionFull=1
              Manager AutoIrr
                Crop = [Mungbean]
                AutoIrrigationOn = True
                FASWThreshold = 0.9
                FASWDepth = 600
                weeks = 0
                afterSowing = 0
                script: same as in Building Dataset.Calibration.Thomas Dissertation.exp1Berken.Exp1Berken.paddock.AutoIrr
          Memo
            DAF trial in Hopeland, QLD with cultivar Jade planted in Summer. Was supposed to be an N fertilizer trial, but not a priority in the model so we just looked at 0N.
        Simulation IrvingdaleN0N
          Clock: Start=2018-12-12; End=2019-04-08
          Summary summaryfile
          Weather: FileName=Irvingdale.xlsx; ExcelWorkSheetName=Irvingdale
          SoilArbitrator Soil Arbitrator
          Zone paddock: Area=1; Slope=0; AspectAngle=0; Altitude=50
            MicroClimate: a_interception=0; b_interception=1; c_interception=0; d_interception=0; SoilHeatFluxFraction=0; MinimumHeightDiffForNewLayer=0; NightInterceptionFraction=0; ReferenceHeight=2
            Irrigation
            Fertiliser
            SurfaceOrganicMatter: InitialResidueName=wheat; InitialResidueType=wheat; InitialResidueMass=500; InitialStandingFraction=0; InitialCPR=0; InitialCNR=40
            Report DailyReport: same as Building Dataset.Calibration.Thomas Dissertation.exp1Berken.Exp1Berken.paddock.DailyReport
            Manager SowingRule
              RowSpacing = 500
              SowingDepth = 40
              SowingRate = 30
              CultivarName = Jade
              SowingDate = 12/28/2018 00:00:00
              script: same as in Building Dataset.Calibration.Thomas Dissertation.exp1Berken.Exp1Berken.paddock.SowingRule
            Manager HarvestRule: same as Building Dataset.Calibration.Thomas Dissertation.exp1Berken.Exp1Berken.paddock.HarvestRule
            Report HarvestReport: same as Building Dataset.Calibration.Thomas Dissertation.exp1Berken.Exp1Berken.paddock.HarvestReport
            Plant Mungbean: ResourceName=Soybean
            Operations
              2018-12-12  [Fertiliser].Apply(Amount: 0, Type: Fertiliser.Types.NH4N, Depth: 150)
              2019-01-09  [Irrigation].Apply(amount: 80)
              2019-02-08  [Irrigation].Apply(amount: 80)
              2018-12-28  [Fertiliser].Apply(Amount: 3.6, Type: Fertiliser.Types.NO3N, Depth: 150)
            Soil: Latitude=0; Longitude=0
              WaterBalance SoilWater: SummerDate=1-Nov; SummerU=6; SummerCona=3.5; WinterDate=1-Apr; WinterU=6; WinterCona=3.5; DiffusConst=88; DiffusSlope=35.4; Salb=0.13; CN2Bare=72; CNRed=20; CNCov=0.8; DischargeWidth=5; CatchmentArea=10; Thickness=[150, 150, 150, 150, 150, 150, 300, 300, 300]
                SWCON=[0.372, 0.372, 0.464, 0.464, 0.392, 0.392, 0.328, 0.328, 0.328]
              CERESSoilTemperature Temperature
              Organic: FOMCNRatio=33
                Thickness  Carbon  SoilCNRatio  FBiom  FInert  FOM
                150        1.94    14.5         0.02   0.36    0
                150        1.38    14.5         0.015  0.5     0
                150        1       14.5         0.01   0.59    0
                150        1       14.5         0.01   0.59    0
                150        0.9     14.5         0.01   0.84    0
                150        0.9     14.5         0.01   0.84    0
                300        0.75    14.5         0.01   0.8     0
                300        0.75    14.5         0.01   0.8     0
                300        0.75    14.5         0.01   0.8     0
              Chemical
                Thickness  NO3N  NH4N  PH
                150        18    10    5.6
                150        13    7     6.5
                150        6     5     7
                150        1     5     7
                150        1     5     7
                150        1     5     7
                300        3     6     7
                300        3     6     7
                300        3     6     7
              Nutrient
              Physical
                Thickness  BD    AirDry  LL15  DUL    SAT
                150        1.36  0.05    0.25  0.392  0.45
                150        1.36  0.25    0.25  0.392  0.45
                150        1.36  0.25    0.25  0.392  0.45
                150        1.36  0.25    0.25  0.392  0.45
                150        1.36  0.27    0.27  0.372  0.45
                150        1.36  0.27    0.27  0.372  0.45
                300        1.36  0.3     0.3   0.372  0.43
                300        1.36  0.3     0.3   0.372  0.43
                300        1.36  0.3     0.3   0.372  0.43
                SoilCrop MungbeanSoil: LL=[0.25, 0.25, 0.25, 0.25, 0.27, 0.27, 0.3, 0.3, 0.3]; KL=[0.08, 0.08, 0.08, 0.08, 0.08, 0.08, 0.08, 0.08, 0.08]; XF=[1, 1, 1, 1, 1, 1, 1, 1, 1]
              Sample Initial conditions: Thickness=[150, 150, 150, 150, 150, 150, 300, 300, 300]; SW=[0.35, 0.35, 0.35, 0.35, 0.35, 0.35, 0.328, 0.328, 0.328]; SWUnits=Volumetric; OCUnits=Total; PHUnits=Water
            Manager AutoIrr
              Crop = [Mungbean]
              AutoIrrigationOn = True
              FASWThreshold = 0.9
              FASWDepth = 600
              weeks = 2
              afterSowing = 20
              script: same as in Building Dataset.Calibration.Thomas Dissertation.exp1Berken.Exp1Berken.paddock.AutoIrr
          Memo
            DAF trial in Irvingdale, QLD with cultivar Jade planted. Was supposed to be an N fertilizer trial, but not a priority in the model so we just looked at 0N.
      Folder Yield_Gap
        Memo Mungbean Yield Gap Study
          CSIRO large-scale, primarily single year field studies that were looking to see what the leading yield limiters were. The data was organized by Brook Anderson (CSIRO) and is being written up by Marisa Collins (LaTrobe) and Lindsay Bell (CSIRO). The cultivar used was Jade with the exception of one site year where they used Crystal.
        Experiment Billa_Billa
          Factors
            Permutation
              Factor Sow
                CompositeFactor 2015
                  Specifications:
                    [SowingRule].Script.SowingRate=30
                    [SowingRule].Script.SowingDate=2015-01-13
                CompositeFactor 2016
                  Specifications:
                    [SowingRule].Script.SowingRate=25
                    [SowingRule].Script.CultivarName=Crystal
                    [SowingRule].Script.SowingDate=2016-01-15
                CompositeFactor 2016_17
                  Specifications:
                    [SowingRule].Script.SowingRate=43
                    [SowingRule].Script.SowingDate=2016-12-23
          Simulation Billa_Billa
            Clock: Start=2015-01-13; End=2017-07-12
            Summary summaryfile
            Weather: FileName=Yield Gap Study\2.ClimateFiles\Glenaradale 41395.met
            SoilArbitrator Soil Arbitrator
            Zone paddock: Area=1; Slope=0; AspectAngle=0; Altitude=50
              MicroClimate: a_interception=0; b_interception=1; c_interception=0; d_interception=0; SoilHeatFluxFraction=0; MinimumHeightDiffForNewLayer=0; NightInterceptionFraction=0; ReferenceHeight=2
              Irrigation
              Fertiliser
              SurfaceOrganicMatter: InitialResidueName=fababeab; InitialResidueType=fababean; InitialResidueMass=2000; InitialStandingFraction=0; InitialCPR=0; InitialCNR=30
              Report DailyReport: same as Building Dataset.Calibration.Thomas Dissertation.exp1Berken.Exp1Berken.paddock.DailyReport
              Manager SowingRule
                RowSpacing = 250
                SowingDepth = 30
                SowingRate = 30
                CultivarName = Jade
                SowingDate = 01/13/2015 00:00:00
                script: same as in Building Dataset.Calibration.Thomas Dissertation.exp1Berken.Exp1Berken.paddock.SowingRule
              Manager HarvestRule: same as Building Dataset.Calibration.Thomas Dissertation.exp1Berken.Exp1Berken.paddock.HarvestRule
              Report HarvestReport: same as Building Dataset.Calibration.Thomas Dissertation.exp1Berken.Exp1Berken.paddock.HarvestReport
              Plant Mungbean: ResourceName=Soybean
              Manager Irrigatefixeddates: same as Building Dataset.Calibration.Thomas Dissertation.exp1Berken.Exp1Berken.paddock.Irrigatefixeddates
              Operations
              Soil Grey Vertosol (Billa Billa No220): ASCOrder=Vertosol; ASCSubOrder=Grey; SoilType=Clay; Site=Billa Billa; NearestTown=Goondiwindi; Region=Darling Downs and Granite Belt; State=Queensland; Country=Australia; NaturalVegetation=Brigalow scrub; ApsoilNumber=220; Latitude=-28.101; Longitude=150.328; LocationAccuracy=+/- 20m; YearOfSampling=0
                DataSource=Undertaken by Jeremy Whish, CSIRO Sustainable Ecosystems, Toowoomba in collaboration with MCA, Goondiwindi as part of GRDC Best Management Practice-Pulses project
                Comments=Calculated from a pond and tent during GRDC Best Management Practice-Pulses project. CLL for chickpea needs to be confirmed at depth, OC from soil (Billa Billa No. 036)
                Physical
                  Thickness  BD     AirDry  LL15  DUL    SAT
                  150        1.48   0.095   0.19  0.36   0.412
                  150        1.5    0.152   0.19  0.35   0.404
                  150        1.459  0.2     0.2   0.37   0.42
                  150        1.514  0.2     0.2   0.349  0.399
                  150        1.6    0.2     0.2   0.31   0.366
                  150        1.6    0.2     0.2   0.31   0.366
                  300        1.72   0.2     0.2   0.27   0.321
                  300        1.72   0.2     0.2   0.27   0.321
                  300        1.74   0.2     0.2   0.26   0.313
                  BD source: Calculated from gravimetric moisture when profile wet but drained
                  AirDry, LL15 source: Estimated based on local knowledge
                  DUL source: Field measured and checked for sensibility
                  SAT source: Calculated from measured, estimated or calculated BD
                  SoilCrop MungbeanSoil: LL=[0.19, 0.19, 0.2, 0.281, 0.288, 0.288, 0.27, 0.27, 0.26]; KL=[0.06, 0.06, 0.06, 0.04, 0.04, 0.04, 0.02, 0.02, 0.02]; XF=[1, 1, 1, 1, 1, 1, 1, 1, 1]
                WaterBalance SoilWater: SummerDate=1-Nov; SummerU=6; SummerCona=3.5; WinterDate=1-Apr; WinterU=4; WinterCona=2.5; DiffusConst=40; DiffusSlope=16; Salb=0.13; CN2Bare=73; CNRed=20; CNCov=0.8; Thickness=[150, 150, 150, 150, 150, 150, 300, 300, 300]; SWCON=[0.3, 0.3, 0.3, 0.3, 0.3, 0.3, 0.3, 0.3, 0.3]
                Organic: FOMCNRatio=40
                  Thickness  Carbon  SoilCNRatio  FBiom  FInert  FOM
                  150        1.24    12           0.04   0.4     347.129
                  150        1.24    12           0.02   0.5     270.344
                  150        1.25    12           0.02   0.5     163.972
                  150        1.1     12           0.02   0.6     99.4541
                  150        0.71    12           0.01   0.6     60.322
                  150        0.71    12           0.01   0.6     60.322
                  300        0.34    12           0.01   0.7     36.587
                  300        0.34    12           0.01   0.7     36.587
                  300        0.26    12           0.01   0.8     22.191
                Chemical
                  Thickness  NO3N     NH4N  PH   CL    EC
                  150        22.4625  0     7.7  10.1  0.2
                  150        13.3333  0     8.2  9.5   0.2
                  150        9.13868  0     8.4  10.7  0.6
                  150        8.80669  0     8.2  12.5  1.5
                  150        1        0.2   7.8  12.5  1
                  150        1        0.2   7.8  12.5  1
                  300        1        0.2   6.9  11.7  0.8
                  300        1        0.2   6.9  11.7  0.8
                  300        1        0.2   6.9  11.7  0.8
                  EC, CL, PH source: Measured
                InitialWater: PercentMethod=0; FractionFull=0.47; RelativeTo=LL15
                Sample Initial conditions: Thickness=[1800]; NH4=[1]; SWUnits=Volumetric; OCUnits=Total; PHUnits=Water
                Nutrient
                CERESSoilTemperature Temperature
              Manager AutoIrr
                Crop = [Mungbean]
                AutoIrrigationOn = True
                FASWThreshold = 0.9
                FASWDepth = 600
                weeks = 3
                afterSowing = 100
                script: same as in Building Dataset.Calibration.Thomas Dissertation.exp1Berken.Exp1Berken.paddock.AutoIrr
        Experiment Emerald
          Factors
            Permutation
              Factor Sow
                CompositeFactor 2015_16S1
                  Specifications:
                    [SowingRule].Script.SowingDate=2015-12-18
                    [Operations]
                  Operations reset
                    2015-12-18  [InitialWaterReset].Script.ResetWater(0,17)
                CompositeFactor 2015_16S2
                  Specifications:
                    [SowingRule].Script.SowingDate=2016-01-13
                    [Operations]
                  Operations reset
                    2016-01-13  [InitialWaterReset].Script.ResetWater(0,36)
                CompositeFactor 2015_16S3
                  Specifications:
                    [SowingRule].Script.SowingDate=2016-02-18
                    [Operations]
                  Operations reset
                    2016-02-18  [InitialWaterReset].Script.ResetWater(0,36)
                CompositeFactor 2016_17S1
                  Specifications:
                    [SowingRule].Script.SowingDate=2016-12-08
                    [Operations]
                  Operations reset
                    2016-12-08  [InitialWaterReset].Script.ResetWater(0,33)
                CompositeFactor 2016_17S2
                  Specifications:
                    [SowingRule].Script.SowingDate=2017-01-18
                    [Operations]
                  Operations reset
                    2016-02-18  [InitialWaterReset].Script.ResetWater(0,62)
                CompositeFactor 2016_17S3
                  Specifications:
                    [SowingRule].Script.SowingDate=2017-03-02
                    [Operations]
                  Operations reset
                    2016-02-18  [InitialWaterReset].Script.ResetWater(0,28)
          Simulation EmeraldYieldGap
            Clock: Start=2016-12-18; End=2017-08-10
            Summary summaryfile
            Weather: FileName=Yield Gap Study\2.ClimateFiles\Glenaradale 41395.met
            SoilArbitrator Soil Arbitrator
            Zone paddock: Area=1; Slope=0; AspectAngle=0; Altitude=50
              MicroClimate: a_interception=0; b_interception=1; c_interception=0; d_interception=0; SoilHeatFluxFraction=0; MinimumHeightDiffForNewLayer=0; NightInterceptionFraction=0; ReferenceHeight=2
              Irrigation
              Fertiliser
              SurfaceOrganicMatter: InitialResidueName=fababean; InitialResidueType=fababean; InitialResidueMass=2000; InitialStandingFraction=0; InitialCPR=0; InitialCNR=30
              Report DailyReport: same as Building Dataset.Calibration.Thomas Dissertation.exp1Berken.Exp1Berken.paddock.DailyReport
              Manager SowingRule: same as Building Dataset.Validation.Yield_Gap.Billa_Billa.Billa_Billa.paddock.SowingRule
              Manager HarvestRule: same as Building Dataset.Calibration.Thomas Dissertation.exp1Berken.Exp1Berken.paddock.HarvestRule
              Report HarvestReport: same as Building Dataset.Calibration.Thomas Dissertation.exp1Berken.Exp1Berken.paddock.HarvestReport
              Plant Mungbean: ResourceName=Soybean
              Manager Irrigatefixeddates: same as Building Dataset.Calibration.Thomas Dissertation.exp1Berken.Exp1Berken.paddock.Irrigatefixeddates
              Operations
              Manager InitialWaterReset
```csharp
using System;
using Models.Core;
using Models.Interfaces;
using Models.Soils;
using APSIM.Shared.Utilities;

namespace Models
{
    [Serializable]
    public class Script : Model
    {
        [Link] private ISummary summary;
        [Link] private IPhysical physical;
        [Link] private ISoilWater soilWater;

        public void ResetWater(int layer, double percentFull)
        {
        	if (percentFull < 0 || percentFull > 100)
        		throw new ArgumentException("percentFull must be in range [0, 100]");
        	if (layer >= physical.Thickness.Length || layer < 0)
        		throw new ArgumentException("layer must be in range [0, " + physical.Thickness.Length + "]");
        	soilWater.SW[layer] = MathUtilities.Divide(percentFull, 100, 0) * physical.PAWC[layer] + physical.LL15[layer];
        	soilWater.SWmm[layer] = MathUtilities.Divide(percentFull, 100, 0) * physical.PAWCmm[layer] + physical.LL15mm[layer];
        }
    }
}
```
              Soil Black Vertosol (Emerald No911): ASCOrder=Vertosol; ASCSubOrder=Black; SoilType=Clay; Site=Emerald; NearestTown=Emerald; Region=Central Highlands; State=Queensland; Country=Australia; ApsoilNumber=911; Latitude=-23.5211; Longitude=148.123; YearOfSampling=0; DataSource=Collected by Brett Cocks (CES) for NVT.
                Physical
                  Thickness  BD     AirDry  LL15   DUL    SAT
                  150        1.422  0.062   0.124  0.384  0.434
                  150        1.431  0.118   0.148  0.379  0.429
                  150        1.46   0.153   0.153  0.353  0.403
                  150        1.44   0.153   0.153  0.365  0.415
                  150        1.416  0.153   0.153  0.387  0.437
                  150        1.416  0.153   0.153  0.387  0.437
                  300        1.394  0.153   0.153  0.401  0.451
                  300        1.394  0.153   0.153  0.401  0.451
                  300        1.407  0.153   0.153  0.396  0.446
                  BD, DUL source: Field measured and checked for sensibility
                  SoilCrop MungbeanSoil
                    LL=[0.124, 0.148, 0.153, 0.265, 0.336, 0.336, 0.401, 0.401, 0.396]
                    KL=[0.06, 0.06, 0.06, 0.04, 0.04, 0.04, 0.02, 0.02, 0.02]
                    XF=[1, 1, 1, 1, 1, 1, 1, 1, 1]
                WaterBalance SoilWater: SummerDate=1-Nov; SummerU=6; SummerCona=3.5; WinterDate=1-Apr; WinterU=2; WinterCona=2; DiffusConst=40; DiffusSlope=16; Salb=0.12; CN2Bare=73; CNRed=20; CNCov=0.8; Thickness=[150, 150, 150, 150, 150, 150, 300, 300, 300]; SWCON=[0.3, 0.3, 0.3, 0.3, 0.3, 0.3, 0.3, 0.3, 0.3]
                Organic: FOMCNRatio=40
                  Thickness  Carbon  SoilCNRatio  FBiom  FInert  FOM
                  150        1.24    12           0.04   0.4     347.129
                  150        1.24    12           0.02   0.5     270.344
                  150        1.25    12           0.02   0.7     163.972
                  150        1.1     12           0.02   1       99.4541
                  150        0.71    12           0.01   1       60.322
                  150        0.71    12           0.01   1       60.322
                  300        0.34    12           0.01   1       36.587
                  300        0.34    12           0.01   1       36.587
                  300        0.34    12           0.01   1       22.191
                Chemical
                  Thickness  NO3N     NH4N  PH   CL     EC
                  150        23.4117  0     7.7  30     0.2
                  150        13.9762  0     8.3  40.3   0.3
                  150        9.13242  0     8.5  26     0.5
                  150        9.25926  0     8.6  138.2  0.8
                  150        1        0.2   8.2  485.4  1
                  150        1        0.2   8.2  485.4  1
                  300        1        0.2   7.6  818.4  1.3
                  300        1        0.2   7.6  818.4  1.3
                  300        1        0.2   7.7  947.2  1.3
                InitialWater: PercentMethod=0; FractionFull=0.36; RelativeTo=LL15
                Sample Initial conditions: Thickness=[1800]; NH4=[1]; SWUnits=Volumetric; OCUnits=Total; PHUnits=Water
                CERESSoilTemperature Temperature
                Nutrient
              Manager AutoIrr
                Crop = [Mungbean]
                AutoIrrigationOn = True
                FASWThreshold = 0.9
                FASWDepth = 600
                weeks = 4
                afterSowing = 10
                script: same as in Building Dataset.Calibration.Thomas Dissertation.exp1Berken.Exp1Berken.paddock.AutoIrr
        Experiment HRS
          Factors
            Permutation
              Factor Sow
                CompositeFactor 2015_16S1
                  Specifications:
                    [SowingRule].Script.SowingDate=2016-02-10
                    [Operations]
                  Operations reset
                    2016-02-10  [InitialWaterReset].Script.ResetWater(0,49)
                CompositeFactor 2015_16S2
                  Specifications:
                    [SowingRule].Script.SowingDate=2016-01-14
                    [Operations]
                  Operations reset
                    2016-01-14  [InitialWaterReset].Script.ResetWater(0,14)
                CompositeFactor 2015_16S3
                  Specifications:
                    [SowingRule].Script.SowingDate=2015-12-08
                    [Operations]
                  Operations reset
                    2015-12-08  [InitialWaterReset].Script.ResetWater(0,11)
                CompositeFactor 2016_17
                  Specifications:
                    [SowingRule].Script.SowingDate=2017-1-06
                    [Operations]
                  Operations reset
                    2017-01-06  [InitialWaterReset].Script.ResetWater(0,33)
          Simulation HRS
            Clock: Start=2015-12-08; End=2016-06-06
            Summary summaryfile
            Weather: FileName=Hermitage.xlsx; ExcelWorkSheetName=Hermitage
            SoilArbitrator Soil Arbitrator
            Zone paddock: Area=1; Slope=0; AspectAngle=0; Altitude=50
              MicroClimate: a_interception=0; b_interception=1; c_interception=0; d_interception=0; SoilHeatFluxFraction=0; MinimumHeightDiffForNewLayer=0; NightInterceptionFraction=0; ReferenceHeight=2
              Irrigation
              Fertiliser
              SurfaceOrganicMatter: InitialResidueName=wheat; InitialResidueType=wheat; InitialResidueMass=0; InitialStandingFraction=0; InitialCPR=0; InitialCNR=80
              Report DailyReport: same as Building Dataset.Calibration.Thomas Dissertation.exp1Berken.Exp1Berken.paddock.DailyReport
              Manager SowingRule: same as Building Dataset.Validation.Yield_Gap.Billa_Billa.Billa_Billa.paddock.SowingRule
              Manager HarvestRule: same as Building Dataset.Calibration.Thomas Dissertation.exp1Berken.Exp1Berken.paddock.HarvestRule
              Report HarvestReport: same as Building Dataset.Calibration.Thomas Dissertation.exp1Berken.Exp1Berken.paddock.HarvestReport
              Plant Mungbean: ResourceName=Soybean
              Manager Irrigatefixeddates: same as Building Dataset.Calibration.Thomas Dissertation.exp1Berken.Exp1Berken.paddock.Irrigatefixeddates
              Operations
              Manager InitialWaterReset: same as Building Dataset.Validation.Yield_Gap.Emerald.EmeraldYieldGap.paddock.InitialWaterReset
              Soil Brown Vertosol-Talgai-shallow phase (Hermitage No033): ASCOrder=Vertosol; ASCSubOrder=Brown; SoilType=Clay; Site=Hermitage; NearestTown=Warwick, Q 4370; Region=Darling Downs and Granite Belt; State=Queensland; Country=Australia; NaturalVegetation=Poplar Box , Ironbark, Qld Blue Gum; ApsoilNumber=33; Latitude=-28.2; Longitude=152.101; LocationAccuracy=+/- 20m; YearOfSampling=0; Comments=oc and ph estimated
                DataSource=Data provided by I.  Broad, Queensland Department of Primary Industries
                Physical
                  Thickness  BD    AirDry  LL15  DUL   SAT
                  150        1.38  0.115   0.23  0.4   0.45
                  150        1.38  0.184   0.23  0.4   0.45
                  150        1.3   0.23    0.23  0.43  0.48
                  150        1.37  0.23    0.23  0.4   0.45
                  150        1.49  0.23    0.23  0.36  0.41
                  150        1.49  0.23    0.23  0.36  0.41
                  300        1.64  0.23    0.23  0.34  0.35
                  300        1.64  0.23    0.23  0.34  0.35
                  300        1.6   0.23    0.23  0.34  0.37
                  BD, DUL source: Field measured and checked for sensibility
                  AirDry, LL15 source: Estimated based on local knowledge
                  SAT source: Calculated from measured, estimated or calculated BD
                  SoilCrop MungbeanSoil: LL=[0.19, 0.19, 0.23, 0.281, 0.288, 0.288, 0.3, 0.3, 0.26]; KL=[0.06, 0.06, 0.06, 0.04, 0.04, 0.04, 0.02, 0.02, 0.02]; XF=[1, 1, 1, 1, 1, 1, 1, 1, 1]
                WaterBalance SoilWater: SummerDate=1-Nov; SummerU=6; SummerCona=3.5; WinterDate=1-Apr; WinterU=4; WinterCona=2.5; DiffusConst=40; DiffusSlope=16; Salb=0.12; CN2Bare=73; CNRed=20; CNCov=0.8; Thickness=[150, 150, 150, 150, 150, 150, 300, 300, 300]; SWCON=[0.3, 0.3, 0.3, 0.3, 0.3, 0.3, 0.3, 0.3, 0.3]
                Organic: FOMCNRatio=40
                  Thickness  Carbon  SoilCNRatio  FBiom  FInert  FOM
                  150        1.24    12           0.04   0.4     347.129
                  150        1.24    12           0.02   0.6     270.344
                  150        1.25    12           0.02   0.8     163.972
                  150        1.1     12           0.02   1       99.4541
                  150        1.1     12           0.02   1       99.454
                  150        0.71    12           0.01   1       60.322
                  300        0.71    12           0.01   1       60.322
                  300        0.34    12           0.01   1       36.587
                  300        0.26    12           0.01   1       22.191
                Chemical
                  Thickness  NO3N     NH4N  PH
                  150        24.1546  0     8
                  150        14.4928  0     8
                  150        10.2564  0     8
                  150        9.73236  0     8
                  150        1        0.2   8
                  150        1        0.2   8
                  300        1        0.2   8
                  300        1        0.2   8
                  300        1        0.2   8
                  PH source: Estimated based on local knowledge
                InitialWater: PercentMethod=0; FractionFull=0.47; RelativeTo=LL15
                Sample Initial conditions: Thickness=[1800]; NH4=[1]; SWUnits=Volumetric; OCUnits=Total; PHUnits=Water
                Nutrient
                CERESSoilTemperature Temperature
              Manager AutoIrr: same as Building Dataset.Validation.Yield_Gap.Emerald.EmeraldYieldGap.paddock.AutoIrr
        Experiment Pampas
          Factors
            Permutation
              Factor Sow
                CompositeFactor M10_dens33_canola
                  Specifications:
                    [SowingRule].Script.SowingDate=2015-12-23
                    [SowingRule].Script.SowingRate=33
                    [SurfaceOrganicMatter].InitialResidueType=canola
                    [SurfaceOrganicMatter].InitialResidueMass=11000
                    [SurfaceOrganicMatter].InitialCNR=40
                CompositeFactor M11_dens26_canola
                  Specifications:
                    [SowingRule].Script.SowingDate=2015-12-23
                    [SowingRule].Script.SowingRate=26
                    [SurfaceOrganicMatter].InitialResidueType=canola
                    [SurfaceOrganicMatter].InitialResidueMass=11000
                    [SurfaceOrganicMatter].InitialCNR=40
                CompositeFactor S3_Dec8_dens37_fallow
                  Specifications:
                    [SowingRule].Script.SowingDate=2015-12-08
                    [SowingRule].Script.SowingRate=37
                    [SurfaceOrganicMatter].InitialResidueType=fieldpea
                    [SurfaceOrganicMatter].InitialResidueMass=0
                    [SurfaceOrganicMatter].InitialCNR=0
                CompositeFactor S6_Dec8_dens36_fallow
                  Specifications:
                    [SowingRule].Script.SowingDate=2015-12-08
                    [SowingRule].Script.SowingRate=36
                    [SurfaceOrganicMatter].InitialResidueType=fieldpea
                    [SurfaceOrganicMatter].InitialResidueMass=0
                    [SurfaceOrganicMatter].InitialCNR=0
                CompositeFactor S14_Jan19_dens23_fallow
                  Specifications:
                    [SowingRule].Script.SowingDate=2016-1-19
                    [SowingRule].Script.SowingRate=23
                    [SurfaceOrganicMatter].InitialResidueType=fieldpea
                    [SurfaceOrganicMatter].InitialResidueMass=0
                    [SurfaceOrganicMatter].InitialCNR=0
          Simulation Pampas
            Clock: Start=2015-12-08; End=2017-06-06
            Summary summaryfile
            Weather: FileName=Yield Gap Study\2.ClimateFiles\Hermitage Stn 41044.met
            SoilArbitrator Soil Arbitrator
            Zone paddock: Area=1; Slope=0; AspectAngle=0; Altitude=50
              MicroClimate: a_interception=0; b_interception=1; c_interception=0; d_interception=0; SoilHeatFluxFraction=0; MinimumHeightDiffForNewLayer=0; NightInterceptionFraction=0; ReferenceHeight=2
              Irrigation
              Fertiliser
              SurfaceOrganicMatter: InitialResidueName=wheat; InitialResidueType=wheat; InitialResidueMass=0; InitialStandingFraction=0; InitialCPR=0; InitialCNR=80
              Report DailyReport: same as Building Dataset.Calibration.Thomas Dissertation.exp1Berken.Exp1Berken.paddock.DailyReport
              Manager SowingRule: same as Building Dataset.Validation.Yield_Gap.Billa_Billa.Billa_Billa.paddock.SowingRule
              Manager HarvestRule: same as Building Dataset.Calibration.Thomas Dissertation.exp1Berken.Exp1Berken.paddock.HarvestRule
              Report HarvestReport: same as Building Dataset.Calibration.Thomas Dissertation.exp1Berken.Exp1Berken.paddock.HarvestReport
              Plant Mungbean: ResourceName=Soybean
              Manager Irrigatefixeddates: same as Building Dataset.Calibration.Thomas Dissertation.exp1Berken.Exp1Berken.paddock.Irrigatefixeddates
              Operations
              Manager InitialWaterReset: same as Building Dataset.Validation.Yield_Gap.Emerald.EmeraldYieldGap.paddock.InitialWaterReset
              Soil: Latitude=0; Longitude=0; YearOfSampling=0
                Sample Initial nitrogen: Thickness=[150, 150, 150, 150, 150, 150, 300, 300, 300]; SWUnits=Volumetric; OCUnits=Total; PHUnits=Water
                  SW=[0.321, 0.434, 0.45, 0.45, 0.482, 0.482, 0.411, 0.411, 0.385]
                Physical
                  Thickness  BD     AirDry  LL15  DUL         SAT
                  150        1.32   0.23    0.25  0.45190891  0.502
                  150        1.24   0.26    0.28  0.452859    0.503
                  150        1.24   0.29    0.29  0.46217408  0.512
                  150        1.29   0.29    0.29  0.46098     0.511
                  150        1.29   0.29    0.29  0.461       0.511
                  150        1.382  0.29    0.29  0.428       0.478
                  300        1.382  0.29    0.29  0.428       0.478
                  300        1.478  0.29    0.29  0.42        0.442
                  300        1.46   0.29    0.29  0.4         0.424
                  SoilCrop MungbeanSoil: LL=[0.25, 0.28, 0.31, 0.32, 0.32, 0.33, 0.33, 0.42, 0.4]; KL=[0.06, 0.06, 0.4, 0.4, 0.4, 0.3, 0.3, 0.02, 0.02]; XF=[1, 1, 1, 1, 1, 1, 1, 1, 1]
                WaterBalance SoilWater: SummerDate=1-Nov; SummerU=6; SummerCona=3.5; WinterDate=1-Apr; WinterU=6; WinterCona=3.5; DiffusConst=40; DiffusSlope=16; Salb=0.13; CN2Bare=73; CNRed=20; CNCov=0.8; Thickness=[150, 150, 150, 150, 150, 150, 300, 300, 300]; SWCON=[0.3, 0.3, 0.3, 0.3, 0.3, 0.3, 0.3, 0.3, 0.3]
                Organic: FOMCNRatio=40
                  Thickness  Carbon  SoilCNRatio  FBiom  FInert  FOM
                  150        1.22    12.5         0.025  0.4     82.9287
                  150        1.13    12.5         0.02   0.6     55.5888
                  150        1.016   12.5         0.015  0.8     30.5078
                  150        0.854   12.5         0.01   0.9     16.743
                  150        0.854   12.5         0.01   0.9     16.743
                  150        0.517   12.5         0.01   0.95    9.189
                  300        0.517   12.5         0.01   0.95    9.189
                  300        0.306   12.5         0.01   0.95    5.043
                  300        0.306   12.5         0.01   0.95    5.043
                Chemical
                  Thickness  NO3N   NH4N  PH    CL     EC
                  150        11     2.75  7.35  8.14   0.2
                  150        11     2.75  8.05  8.14   0.25
                  150        10.25  2.5   8.48  8.14   0.31
                  150        14     2.25  8.87  9.42   0.4
                  150        1      0.2   9.09  19.24  0.59
                  150        1      0.2   9.15  38.29  0.84
                  300        1      0.2   9.09  19.24  0.59
                  300        1      0.2   9.15  38.29  0.84
                  300        1      0.2   9.15  38.29  0.84
                InitialWater Initial water: PercentMethod=0; FractionFull=1
                Nutrient
                CERESSoilTemperature Temperature
        Simulation TheGlen2013_14S
          Clock: Start=2014-02-18; End=2014-05-20
          Summary summaryfile
          Weather: FileName=Yield Gap Study\2.ClimateFiles\The_Glen.met
          SoilArbitrator Soil Arbitrator
          Zone paddock: Area=1; Slope=0; AspectAngle=0; Altitude=50
            MicroClimate: a_interception=0; b_interception=1; c_interception=0; d_interception=0; SoilHeatFluxFraction=0; MinimumHeightDiffForNewLayer=0; NightInterceptionFraction=0; ReferenceHeight=2
            Irrigation
            Fertiliser
            SurfaceOrganicMatter: InitialResidueName=wheat; InitialResidueType=wheat; InitialResidueMass=0; InitialStandingFraction=0; InitialCPR=0; InitialCNR=80
            Report DailyReport: same as Building Dataset.Calibration.Thomas Dissertation.exp1Berken.Exp1Berken.paddock.DailyReport
            Manager SowingRule
              RowSpacing = 250
              SowingDepth = 30
              SowingRate = 30
              CultivarName = Jade
              SowingDate = 02/18/2014 00:00:00
              script: same as in Building Dataset.Calibration.Thomas Dissertation.exp1Berken.Exp1Berken.paddock.SowingRule
            Manager HarvestRule: same as Building Dataset.Calibration.Thomas Dissertation.exp1Berken.Exp1Berken.paddock.HarvestRule
            Report HarvestReport: same as Building Dataset.Calibration.Thomas Dissertation.exp1Berken.Exp1Berken.paddock.HarvestReport
            Plant Mungbean: ResourceName=Soybean
            Manager Irrigatefixeddates: same as Building Dataset.Calibration.Thomas Dissertation.exp1Berken.Exp1Berken.paddock.Irrigatefixeddates
            Operations
            Soil Grey Vertosol Downs (Capella No1275): ASCOrder=Vertosol; SoilType=Grey Vertosol; LocalName=Downs; Site=Capella; NearestTown=Capella; Region=Central Highlands; State=Queensland; Country=Australia; NaturalVegetation=Brigalow; ApsoilNumber=1275; Latitude=-23.2321; Longitude=148.11336; LocationAccuracy=+/-20 m; YearOfSampling=2015; DataSource=Brett Cocks CSIRO Agriculture; Comments=Plain on back plain
              Physical
                Thickness  BD       AirDry    LL15      DUL       SAT
                150        1.30147  0.130581  0.261162  0.428878  0.478878
                150        1.18974  0.20893   0.261162  0.471043  0.521043
                150        1.18506  0.261162  0.261162  0.472806  0.522806
                150        1.185    0.261162  0.261162  0.473     0.523
                150        1.247    0.261162  0.261162  0.449     0.499
                150        1.247    0.261     0.261     0.449     0.499
                300        1.449    0.261     0.261     0.373     0.423
                300        1.449    0.261     0.261     0.373     0.423
                300        1.449    0.261     0.261     0.373     0.423
                BD, DUL source: Field measured and checked for sensibility
                AirDry, LL15 source: Estimated based on local knowledge
                SAT source: Calculated from measured, estimated or calculated BD
                SoilCrop MungbeanSoil: LL=[0.225, 0.239, 0.261, 0.261, 0.36, 0.36, 0.34, 0.34, 0.34]; KL=[0.6, 0.6, 0.6, 0.6, 0.04, 0.04, 0.04, 0.04, 0.04]; XF=[1, 1, 1, 1, 1, 1, 1, 1, 1]
              WaterBalance SoilWater: SummerDate=1-nov; SummerU=6; SummerCona=3.5; WinterDate=1-apr; WinterU=4; WinterCona=2.5; DiffusConst=40; DiffusSlope=16; Salb=0.12; CN2Bare=73; CNRed=20; CNCov=0.08; Thickness=[150, 150, 150, 150, 150, 150, 300, 300, 300]; SWCON=[0.3, 0.3, 0.3, 0.3, 0.3, 0.3, 0.3, 0.3, 0.3]
              Organic: FOMCNRatio=40
                Thickness  Carbon  SoilCNRatio  FBiom  FInert  FOM
                150        0.806   12           0.6    0.4     523.082
                150        0.806   12           0.6    0.4     523.082
                150        0.689   12           0.4    0.6     317.265
                150        0.689   12           0.4    0.6     317.265
                150        0.715   12           0.2    0.8     116.715
                150        0.715   12           0.2    0.8     116.715
                300        0.494   12           0.05   0.95    42.937
                300        0.494   12           0.05   0.95    42.937
                300        0.494   12           0.05   0.95    42.937
              Chemical
                Thickness  NO3N     NH4N  PH   CL   EC     ESP
                150        11.6667  4     7.4  5.4  0.096  1.62879
                150        11.667   4     7.4  5.4  0.096  1.629
                150        5        4     7.9  2.4  0.097  2.379
                150        5        4     7.9  2.4  0.097  2.379
                150        4        4     8.1  2.8  0.133  3.321
                150        4        4     8.1  2.8  0.133  3.321
                300        3        4     8.6  3.3  0.17   4.569
                300        3        4     8.6  3.3  0.17   4.569
                300        3        4     8.6  3.3  0.17   4.569
                EC, CL, PH source: Measured
                ESP source: C
              Sample InitialNitrogen: Thickness=[150, 150, 150, 150, 150, 150, 300, 300, 300]; SWUnits=Volumetric; OCUnits=Total; PHUnits=Water
                SW=[0.373, 0.373, 0.45, 0.45, 0.448, 0.448, 0.423, 0.423, 0.353]
              InitialWater Initial water: PercentMethod=0; FractionFull=1
              Nutrient
              CERESSoilTemperature Temperature
        Simulation Belvedere2013_14S
          Clock: Start=2014-12-19; End=2015-04-23
          Summary summaryfile
          Weather: FileName=Yield Gap Study\2.ClimateFiles\Belvedere.xlsx; ExcelWorkSheetName=Sheet1
          SoilArbitrator Soil Arbitrator
          Zone paddock: Area=1; Slope=0; AspectAngle=0; Altitude=50
            MicroClimate: a_interception=0; b_interception=1; c_interception=0; d_interception=0; SoilHeatFluxFraction=0; MinimumHeightDiffForNewLayer=0; NightInterceptionFraction=0; ReferenceHeight=2
            Irrigation
            Fertiliser
            SurfaceOrganicMatter: InitialResidueName=wheat; InitialResidueType=wheat; InitialResidueMass=5000; InitialStandingFraction=0; InitialCPR=0; InitialCNR=80
            Report DailyReport: same as Building Dataset.Calibration.Thomas Dissertation.exp1Berken.Exp1Berken.paddock.DailyReport
            Manager SowingRule
              RowSpacing = 250
              SowingDepth = 30
              SowingRate = 30
              CultivarName = Jade
              SowingDate = 12/20/2014 00:00:00
              script: same as in Building Dataset.Calibration.Thomas Dissertation.exp1Berken.Exp1Berken.paddock.SowingRule
            Manager HarvestRule: same as Building Dataset.Calibration.Thomas Dissertation.exp1Berken.Exp1Berken.paddock.HarvestRule
            Report HarvestReport: same as Building Dataset.Calibration.Thomas Dissertation.exp1Berken.Exp1Berken.paddock.HarvestReport
            Plant Mungbean: ResourceName=Soybean
            Manager Irrigatefixeddates: same as Building Dataset.Calibration.Thomas Dissertation.exp1Berken.Exp1Berken.paddock.Irrigatefixeddates
            Operations
            Soil Brown Clay-Kianga Red (Banana No045): ASCOrder=Vertosol; ASCSubOrder=Brown; SoilType=Clay; Site=Banana; NearestTown=Banana, Q 4702; Region=Capricornia; State=Queensland; Country=Australia; ApsoilNumber=45; Latitude=-24.42; Longitude=150.143; LocationAccuracy=+/- 20m; YearOfSampling=0; DataSource=Qld Department of Primary Industries and Fisheries (D Lack)
              Physical
                Thickness  BD    AirDry  LL15  DUL   SAT
                150        1.34  0.09    0.18  0.35  0.4
                150        1.36  0.144   0.18  0.41  0.46
                150        1.42  0.22    0.22  0.38  0.43
                150        1.42  0.22    0.22  0.38  0.43
                150        1.58  0.2     0.2   0.32  0.37
                150        1.58  0.2     0.2   0.32  0.37
                300        1.55  0.19    0.19  0.34  0.39
                300        1.55  0.19    0.19  0.34  0.39
                300        1.55  0.19    0.19  0.34  0.39
                BD, DUL source: Field measured and checked for sensibility
                AirDry, LL15 source: Estimated based on local knowledge
                SAT source: Calculated from measured, estimated or calculated BD
                SoilCrop MungbeanSoil
                  LL=[0.228, 0.233, 0.242, 0.242, 0.266, 0.266, 0.311, 0.311, 0.311]
                  KL=[0.07, 0.07, 0.07, 0.07, 0.05, 0.05, 0.05, 0.05, 0.05]
                  XF=[1, 1, 1, 1, 1, 1, 1, 1, 1]
              WaterBalance SoilWater: same as Building Dataset.Validation.Yield_Gap.HRS.HRS.paddock.Brown Vertosol-Talgai-shallow phase (Hermitage No033).SoilWater
              Organic: FOMCNRatio=40
                Thickness  Carbon  SoilCNRatio  FBiom  FInert  FOM
                150        1.19    12           0.04   1       446.88
                150        1.01    12           0.02   1       307.136
                150        1.01    12           0.02   1       307.136
                150        0.45    12           0.02   1       145.081
                150        0.45    12           0.02   1       145.081
                150        0.3     12           0.02   1       68.531
                300        0.3     12           0.02   1       68.531
                300        0.2     12           0.01   1       32.372
                300        0.2     12           0.01   1       32.372
              Chemical
                Thickness  NO3N     NH4N  PH
                150        3.66667  5     8.2
                150        3        5     8.5
                150        3        5     8.5
                150        2        5     8.6
                150        2        5     8.6
                150        1        5     8.6
                300        1        5     8.6
                300        4        5     7.4
                300        4        5     7.4
                PH source: Estimated based on local knowledge
              Sample Initial conditions: Thickness=[150, 150, 150, 150, 150, 150, 300, 300, 300]; SWUnits=Volumetric; OCUnits=Total; PHUnits=Water
                SW=[0.335, 0.386, 0.386, 0.386, 0.314, 0.314, 0.322, 0.322, 0.327]
              InitialWater Initial water: PercentMethod=0; FractionFull=1
              Nutrient
              CERESSoilTemperature Temperature
        Simulation Dalby2013_14S
          Clock: Start=2014-01-30; End=2014-05-23
          Summary summaryfile
          Weather: FileName=Yield Gap Study\2.ClimateFiles\Dalby.xlsx; ExcelWorkSheetName=Dalby
          SoilArbitrator Soil Arbitrator
          Zone paddock: Area=1; Slope=0; AspectAngle=0; Altitude=50
            MicroClimate: a_interception=0; b_interception=1; c_interception=0; d_interception=0; SoilHeatFluxFraction=0; MinimumHeightDiffForNewLayer=0; NightInterceptionFraction=0; ReferenceHeight=2
            Irrigation
            Fertiliser
            SurfaceOrganicMatter: InitialResidueName=wheat; InitialResidueType=wheat; InitialResidueMass=0; InitialStandingFraction=0; InitialCPR=0; InitialCNR=80
            Report DailyReport: same as Building Dataset.Calibration.Thomas Dissertation.exp1Berken.Exp1Berken.paddock.DailyReport
            Manager SowingRule
              RowSpacing = 250
              SowingDepth = 30
              SowingRate = 30
              CultivarName = Jade
              SowingDate = 01/30/2014 00:00:00
              script: same as in Building Dataset.Calibration.Thomas Dissertation.exp1Berken.Exp1Berken.paddock.SowingRule
            Manager HarvestRule: same as Building Dataset.Calibration.Thomas Dissertation.exp1Berken.Exp1Berken.paddock.HarvestRule
            Report HarvestReport: same as Building Dataset.Calibration.Thomas Dissertation.exp1Berken.Exp1Berken.paddock.HarvestReport
            Plant Mungbean: ResourceName=Soybean
            Manager Irrigatefixeddates: same as Building Dataset.Calibration.Thomas Dissertation.exp1Berken.Exp1Berken.paddock.Irrigatefixeddates
            Operations
            Soil Black Vertosol-Bongeen (Dalby No027): ASCOrder=Vertosol; ASCSubOrder=Black; SoilType=Clay; Site=Dalby; NearestTown=Dalby, Q 4405; Region=Darling Downs and Granite Belt; State=Queensland; Country=Australia; ApsoilNumber=27; Latitude=-27.12; Longitude=151.305; LocationAccuracy=+/- 20m; YearOfSampling=0; DataSource=CSIRO Sustainable Ecosystems, Toowoomba
              Comments=Toowoomba - Wheat ll,xf copied from sorghum. Wheat kl is just default apsim kl values for wheat.
              Physical
                Thickness  BD    AirDry  LL15  DUL   SAT
                150        1.25  0.115   0.23  0.45  0.5
                150        1.31  0.184   0.23  0.43  0.48
                150        1.31  0.184   0.23  0.43  0.48
                150        1.23  0.23    0.23  0.46  0.51
                150        1.23  0.23    0.23  0.46  0.51
                150        1.24  0.23    0.23  0.45  0.5
                300        1.25  0.23    0.23  0.45  0.5
                300        1.26  0.23    0.23  0.44  0.49
                300        1.29  0.23    0.23  0.43  0.48
                BD, DUL source: Field measured and checked for sensibility
                AirDry, LL15 source: Estimated based on local knowledge
                SAT source: Calculated from measured, estimated or calculated BD
                SoilCrop MungbeanSoil: LL=[0.23, 0.24, 0.24, 0.29, 0.29, 0.395, 0.424, 0.44, 0.43]; KL=[0.06, 0.06, 0.06, 0.06, 0.06, 0.04, 0.04, 0.02, 0.01]; XF=[1, 1, 1, 1, 1, 1, 1, 1, 1]
              WaterBalance SoilWater: same as Building Dataset.Validation.Yield_Gap.HRS.HRS.paddock.Brown Vertosol-Talgai-shallow phase (Hermitage No033).SoilWater
              Organic: FOMCNRatio=40
                Thickness  Carbon  SoilCNRatio  FBiom  FInert  FOM
                150        1.19    12           0.04   0.4     347.129
                150        1.01    12           0.02   0.6     270.344
                150        0.45    12           0.02   0.8     163.972
                150        0.3     12           0.02   1       99.4541
                150        0.3     12           0.02   1       99.454
                150        0.2     12           0.01   1       60.322
                300        0.2     12           0.01   1       60.322
                300        0.16    12           0.01   1       36.587
                300        0.17    12           0.01   1       22.191
              Chemical
                Thickness  NO3N     NH4N  PH
                150        26.4224  0     8.2
                150        15.2672  0     8.5
                150        10.8401  0     8.6
                150        10.7527  0     8.6
                150        1        0.2   7.4
                150        1        0.2   7.4
                300        1        0.2   5.3
                300        1        0.2   5.3
                300        1        0.2   5.3
                PH source: Estimated based on local knowledge
              InitialWater: PercentMethod=0; FractionFull=0.27; RelativeTo=LL15
              Sample Initial conditions: Thickness=[1800]; NH4=[1]; SWUnits=Volumetric; OCUnits=Total; PHUnits=Water
              Nutrient
              CERESSoilTemperature Temperature
        Simulation Kingaroy
          Clock: Start=2015-11-20; End=2017-06-05
          Summary summaryfile
          Weather: FileName=Yield Gap Study\2.ClimateFiles\Kingaroy_Airport_40922.met
          SoilArbitrator Soil Arbitrator
          Zone paddock: Area=1; Slope=0; AspectAngle=0; Altitude=50
            MicroClimate: a_interception=0; b_interception=1; c_interception=0; d_interception=0; SoilHeatFluxFraction=0; MinimumHeightDiffForNewLayer=0; NightInterceptionFraction=0; ReferenceHeight=2
            Irrigation
            Fertiliser
            SurfaceOrganicMatter: InitialResidueName=wheat; InitialResidueType=wheat; InitialResidueMass=0; InitialStandingFraction=0; InitialCPR=0; InitialCNR=80
            Report DailyReport: same as Building Dataset.Calibration.Thomas Dissertation.exp1Berken.Exp1Berken.paddock.DailyReport
            Manager SowingRule
              RowSpacing = 250
              SowingDepth = 30
              SowingRate = 30
              CultivarName = Jade
              SowingDate = 02/10/2016 00:00:00
              script: same as in Building Dataset.Calibration.Thomas Dissertation.exp1Berken.Exp1Berken.paddock.SowingRule
            Manager HarvestRule: same as Building Dataset.Calibration.Thomas Dissertation.exp1Berken.Exp1Berken.paddock.HarvestRule
            Report HarvestReport: same as Building Dataset.Calibration.Thomas Dissertation.exp1Berken.Exp1Berken.paddock.HarvestReport
            Plant Mungbean: ResourceName=Soybean
            Manager Irrigatefixeddates: same as Building Dataset.Calibration.Thomas Dissertation.exp1Berken.Exp1Berken.paddock.Irrigatefixeddates
            Operations
            Manager InitialWaterReset: same as Building Dataset.Validation.Yield_Gap.Emerald.EmeraldYieldGap.paddock.InitialWaterReset
            Soil Black Vertosol (Kumbia No162): ASCOrder=Vertosol; ASCSubOrder=Black; SoilType=Clay; Site=Hale Creek; NearestTown=Kumbia; Region=Wide Bay and Burnett; State=Queensland; Country=Australia; ApsoilNumber=162; Latitude=-26.688; Longitude=151.656; LocationAccuracy=+/- 10km; YearOfSampling=0; Comments=Wheat CLL estimated
              DataSource=CSIRO Tropical Crops and Pastures in collaboration with Agforce Queensland
              Physical
                Thickness  BD     AirDry  LL15  DUL    SAT
                150        1.032  0.155   0.31  0.53   0.58
                150        1.054  0.248   0.31  0.522  0.572
                150        1.026  0.31    0.31  0.533  0.583
                150        1.026  0.31    0.31  0.533  0.583
                150        1.05   0.31    0.31  0.524  0.574
                150        1.05   0.31    0.31  0.524  0.574
                300        1.142  0.31    0.31  0.489  0.539
                300        1.213  0.31    0.31  0.462  0.512
                300        1.249  0.31    0.31  0.449  0.499
                SoilCrop MungbeanSoil: LL=[0.31, 0.31, 0.31, 0.31, 0.447, 0.447, 0.463, 0.462, 0.449]; KL=[0.06, 0.06, 0.06, 0.06, 0.04, 0.04, 0.04, 0.02, 0.01]; XF=[1, 1, 1, 1, 1, 1, 1, 1, 1]
              WaterBalance SoilWater: same as Building Dataset.Validation.Yield_Gap.HRS.HRS.paddock.Brown Vertosol-Talgai-shallow phase (Hermitage No033).SoilWater
              Organic: FOMCNRatio=40
                Thickness  Carbon  SoilCNRatio  FBiom  FInert  FOM
                150        2.236   12           0.04   0.4     347.129
                150        1.794   12           0.02   0.6     270.344
                150        1.118   12           0.02   0.8     163.972
                150        0.559   12           0.02   1       99.4541
                150        0.559   12           0.02   1       99.454
                150        0.338   12           0.01   1       60.322
                300        0.338   12           0.01   1       60.322
                300        0.221   12           0.01   1       36.587
                300        0.221   12           0.01   1       22.191
              Chemical
                Thickness  NO3N     NH4N  PH   CL     EC
                150        32.1649  0     6.9  37.5   0.1
                150        18.9753  0     7.3  52.1   0.1
                150        12.9955  0     7.9  232.5  0.4
                150        12.6984  0     8.1  501.3  0.5
                150        1        0.2   8.1  700.5  0.6
                150        1        0.2   8.1  700.5  0.6
                300        1        0.2   8.1  689.6  0.6
                300        1        0.2   8.1  559.6  0.5
                300        1        0.2   8.1  559.6  0.5
                PH source: Unknown source or quality of data
              InitialWater: PercentMethod=0; FractionFull=0.45; RelativeTo=LL15
              Sample Initial conditions: Thickness=[1800]; NH4=[1]; SWUnits=Volumetric; OCUnits=Total; PHUnits=Water
              Nutrient
              CERESSoilTemperature Temperature
            Manager AutoIrr
              Crop = [Mungbean]
              AutoIrrigationOn = True
              FASWThreshold = 0.9
              FASWDepth = 600
              weeks = 1
              afterSowing = 10
              script: same as in Building Dataset.Calibration.Thomas Dissertation.exp1Berken.Exp1Berken.paddock.AutoIrr
        Experiment Warra
          Factors
            Permutation
              Factor Sow
                CompositeFactor 2014
                  Specifications:
                    [SowingRule].Script.SowingDate=2014-12-23
                    [Operations]
                  Operations reset
                    2016-01-14  [InitialWaterReset].Script.ResetWater(0,14)
                CompositeFactor 2015
                  Specifications:
                    [SowingRule].Script.SowingDate=2015-12-11
                    [Operations]
                  Operations reset
                    2015-12-08  [InitialWaterReset].Script.ResetWater(0,11)
          Simulation Warra
            Clock: Start=2013-01-01; End=2016-05-15
            Summary summaryfile
            Weather: FileName=Yield Gap Study\2.ClimateFiles\EhlmaPark.xlsx; ExcelWorkSheetName=EhlmaPark
            SoilArbitrator Soil Arbitrator
            Zone paddock: Area=1; Slope=0; AspectAngle=0; Altitude=50
              MicroClimate: a_interception=0; b_interception=1; c_interception=0; d_interception=0; SoilHeatFluxFraction=0; MinimumHeightDiffForNewLayer=0; NightInterceptionFraction=0; ReferenceHeight=2
              Irrigation
              Fertiliser
              SurfaceOrganicMatter: InitialResidueName=wheat; InitialResidueType=wheat; InitialResidueMass=5000; InitialStandingFraction=0; InitialCPR=0; InitialCNR=80
              Report DailyReport: same as Building Dataset.Calibration.Thomas Dissertation.exp1Berken.Exp1Berken.paddock.DailyReport
              Manager SowingRule
                RowSpacing = 250
                SowingDepth = 30
                SowingRate = 30
                CultivarName = Jade
                SowingDate = 12/10/2013 00:00:00
```csharp
using APSIM.Shared.Utilities;
using Models.PMF;
using Models.Core;
using System;
        
        namespace Models
        {
           [Serializable] 
           [System.Xml.Serialization.XmlInclude(typeof(Model))]
            public class Script : Model
            {      
               [Link] Plant Mungbean;
               [Link] Clock Clock;

               [Description("Spacing (mm) between rows")]
               public double RowSpacing { get; set; }
               [Description("Depth (mm) Grains are planted")]
               public double SowingDepth { get; set; }
               [Description("Seeds sown (/m2)")]
               public double SowingRate { get; set; }
               [Description("Cultivar")]
               [Display(Type=DisplayType.CultivarName)]
               public string CultivarName { get; set; }
               [Description("Sowing Date")]
               public DateTime SowingDate { get; set; }

               [EventSubscribe("DoManagement")]
               private void OnDoManagement(object sender, EventArgs e)
               {
                if (Clock.Today.Date == SowingDate)
                	Sow();
           
                    
               }
               public void Sow()
               {Mungbean.Sow(population:SowingRate, cultivar:CultivarName, depth:SowingDepth, rowSpacing:RowSpacing, budNumber:1);
               }
            }
        }
```
              Manager HarvestRule: same as Building Dataset.Calibration.Thomas Dissertation.exp1Berken.Exp1Berken.paddock.HarvestRule
              Report HarvestReport: same as Building Dataset.Calibration.Thomas Dissertation.exp1Berken.Exp1Berken.paddock.HarvestReport
              Plant Mungbean: ResourceName=Soybean
              Manager Irrigatefixeddates: same as Building Dataset.Calibration.Thomas Dissertation.exp1Berken.Exp1Berken.paddock.Irrigatefixeddates
              Operations
              Soil Grey Vertosol-Brigalow (Haystack No022): ASCOrder=Vertosol; ASCSubOrder=Grey; SoilType=Clay; Site=Haystack; NearestTown=Brigalow, Q 4412; Region=Darling Downs and Granite Belt; State=Queensland; Country=Australia; NaturalVegetation=Brigalow scrub; ApsoilNumber=22; Latitude=-26.836; Longitude=150.855; LocationAccuracy=+/- 20m; YearOfSampling=0; DataSource=CSIRO Sustainable Ecosystems, Toowoomba
                WaterBalance SoilWater: same as Building Dataset.Validation.Yield_Gap.HRS.HRS.paddock.Brown Vertosol-Talgai-shallow phase (Hermitage No033).SoilWater
                Organic: FOMCNRatio=40
                  Thickness  Carbon  SoilCNRatio  FBiom  FInert  FOM
                  150        1.19    12           0.04   0.4     347.129
                  150        1.01    12           0.02   0.6     270.344
                  150        0.45    12           0.02   0.8     163.972
                  150        0.3     12           0.02   1       99.4541
                  150        0.2     12           0.01   1       60.322
                  150        0.2     12           0.01   1       60.322
                  300        0.16    12           0.01   1       36.587
                  300        0.16    12           0.01   1       36.587
                  300        0.17    12           0.01   1       22.191
                Chemical
                  Thickness  NO3N     NH4N  PH
                  150        23.4742  0     8.2
                  150        14.0845  0     8.5
                  150        9.32401  0     8.6
                  150        9.38967  0     8.6
                  150        1        0.2   7.4
                  150        1        0.2   7.4
                  300        1        0.2   5.3
                  300        1        0.2   5.3
                  300        1        0.2   5.3
                  PH source: Estimated based on local knowledge
                Sample Initial conditions: Thickness=[1800]; NH4=[1]; SWUnits=Volumetric; OCUnits=Total; PHUnits=Water
                Physical
                  Thickness  BD    AirDry  LL15  DUL   SAT
                  150        1.42  0.095   0.19  0.39  0.44
                  150        1.42  0.152   0.19  0.38  0.43
                  150        1.43  0.19    0.19  0.38  0.43
                  150        1.42  0.19    0.19  0.38  0.43
                  150        1.4   0.19    0.19  0.39  0.44
                  150        1.4   0.19    0.19  0.39  0.44
                  300        1.45  0.19    0.19  0.37  0.42
                  300        1.45  0.19    0.19  0.37  0.42
                  300        1.47  0.19    0.19  0.36  0.41
                  SoilCrop MungbeanSoil: LL=[0.19, 0.19, 0.19, 0.2, 0.22, 0.23, 0.23, 0.23, 0.23]; KL=[0.06, 0.06, 0.06, 0.04, 0.04, 0.04, 0.02, 0.02, 0.02]; XF=[1, 1, 1, 1, 1, 1, 1, 1, 1]
                Nutrient
                CERESSoilTemperature Temperature
                InitialWater: PercentMethod=0; FractionFull=0.27; RelativeTo=LL15
              Manager InitialWaterReset: same as Building Dataset.Validation.Yield_Gap.Emerald.EmeraldYieldGap.paddock.InitialWaterReset
              Manager AutoIrr: same as Building Dataset.Validation.Mungbean_DAF.HopelandSummer.HopelandSummer.paddock.AutoIrr
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