Simulations: Version=53
  Memo TitlePage
    # The APSIM Soil Nutrient Model

    The APSIM Soil Nutrient model has been developed using approaches similar to those employed in the APSIM Plant Modelling Framework (PMF) of [brown_plant_2014]. This new framework provides a library of process submodels that can be coupled, at runtime, to construct a model in much the same way that models can be coupled to construct a simulation.

    The soil nutrient model consists of:

    * a collection of soil organic matter pools
    * a collection of soil mineral N pools
    * a series of carbon flows that capture the flow of C from one pool to another, with associated CO2 losses and movement of N between pools and associated mineralisation or immobilisation of mineral N to facilitiate this flow.
    * a series of nitrogen flows that capture the movement of N between mineral N pools, or losses of N to the atmosphere.

    This work builds upon earlier APSIM soil organic matter models such as SoilN ([probert_apsims_1998]).
  Replacements
    Plant Bambatsi: CropType=Bambatsi; IsEnding=false; DaysAfterEnding=0
      AccumulateFunction Age: StartStageName=Emergence; EndStageName=Old; FractionRemovedOnCut=0; FractionRemovedOnHarvest=0; FractionRemovedOnGraze=0; FractionRemovedOnPrune=0
        Constant day: FixedValue=0.00273973
      PhotoperiodFunction Photoperiod: Twilight=-6; DayLength=0
      Phenology
        StageBasedInterpolation StageCode: Stages=[Emergence, EndJuvenile, Maturity, Old]; Codes=[1, 2, 3, 4]; Proportional=true
        Constant ThermalTime: FixedValue=1
        GerminatingPhase Germinating: Start=Sowing; End=Germination
        EmergingPhase Emerging: ShootLag=7; ShootRate=0; Start=Germination; End=Emergence; TTForTimeStep=0
          VariableReference ThermalTime: VariableName=[Phenology].ThermalTime.Value()
        GenericPhase Juvenile: Start=Emergence; End=EndJuvenile
          Constant Progression: FixedValue=1
          Constant Target: FixedValue=365
        GenericPhase Mature: Start=EndJuvenile; End=Maturity
          Constant Progression: FixedValue=1
          Constant Target: FixedValue=1825
        GenericPhase Declining: Start=Maturity; End=Old
          Constant Progression: FixedValue=1
          Constant Target: FixedValue=27010
        EndPhase Old: Start=Old; End=Unused
          Constant ThermalTime: FixedValue=1
      OrganArbitrator Arbitrator
        RelativeAllocation NArbitrator
        RelativeAllocation DMArbitrator
      CompositeBiomass AboveGround: Propertys=[[Leaf].Live, [Leaf].Dead, [Stem].Live, [Stem].Dead]; DMDOfStructural=0.6
      CompositeBiomass AboveGroundLive: Propertys=[[Leaf].Live, [Stem].Live]; DMDOfStructural=0.6
      CompositeBiomass AboveGroundDead: Propertys=[[Leaf].Dead, [Stem].Dead]; DMDOfStructural=0.6
      CompositeBiomass BelowGround: Propertys=[[Root].Live, [Root].Dead]; DMDOfStructural=0.6
      CompositeBiomass Total: DMDOfStructural=0.6
        Propertys=[[Leaf].Live, [Leaf].Dead, [Stem].Live, [Stem].Dead, [Root].Live, [Root].Dead]
      CompositeBiomass TotalLive: Propertys=[[Leaf].Live, [Stem].Live, [Root].Live]; DMDOfStructural=0.6
      CompositeBiomass TotalDead: Propertys=[[Leaf].Dead, [Stem].Dead, [Root].Dead]; DMDOfStructural=0.6
      PerennialLeaf Leaf: CohortsInitialised=false; Albedo=0.2; Gsmax350=0.0075; R50=200; MicroClimatePresent=true
        zero: MaintenanceRespiration, GrowthRespiration, ApicalCohortNo, TipsAtEmergence, CohortsAtInitialisation, AppearedCohortNo, PlantAppearedLeafNo, InitialisedCohortNo, Height, FRGR, PotentialEP, WaterDemand
        MultiplyFunction InitialWtFunction
          Constant InitialPlantWt: FixedValue=0.01; Units=g/plant
          VariableReference Population: VariableName=[Plant].Population
        MinimumFunction FRGRFunction
          AirTemperatureFunction FRGRFunctionTemp
            XYPairs: X=[5, 20, 25, 35]; Y=[0, 1, 1, 0]
        Constant ExtinctionCoefficient: FixedValue=0.57
          Memo
            Value of 0.57 from
            Radiation Interception and Growth of Planted and Coppice Stands of Four Fast-GrowingTropical Trees
            Author(s): Robin A. Harrington and James H. Fownes
            Source: Journal of Applied Ecology, Vol. 32, No. 1 (Feb., 1995), pp. 1-8

            But their data suggests a value of 0.3
        LinearInterpolationFunction HeightFunction: XProperty=[AboveGround].Wt
          XYPairs: X=[0, 100, 1000]; Y=[100, 300, 1200]
        Constant MaximumNConc: FixedValue=0.025
          Memo
            0.043 gN/g from R.B. Thomas 1, D.D. Richter 2, H. Ye 2, P.R. Heine z, and B.R. Strain 1 Nitrogen dynamics and growth of seedlings of an N-fixing tree
            (GKricidia sepium (Jacq.) Walp.) exposed to elevated atmospheric carbon dioxide Oecologia (1991) 88:415-421
        Constant MinimumNConc: FixedValue=0.015
        Constant NReallocationFactor: FixedValue=0
        BiomassRemoval BiomassRemovalDefaults
          OrganBiomassRemovalType Harvest: FractionLiveToRemove=0.9; FractionDeadToRemove=0.9; FractionLiveToResidue=0; FractionDeadToResidue=0
          OrganBiomassRemovalType Cut: FractionLiveToRemove=0.8; FractionDeadToRemove=0; FractionLiveToResidue=0; FractionDeadToResidue=0
          OrganBiomassRemovalType Prune: FractionLiveToRemove=0; FractionDeadToRemove=0; FractionLiveToResidue=0.6; FractionDeadToResidue=0
          OrganBiomassRemovalType Graze: FractionLiveToRemove=0.6; FractionDeadToRemove=0; FractionLiveToResidue=0.1; FractionDeadToResidue=0
        Constant LeafResidenceTime: FixedValue=130
        Constant DMConversionEfficiency: FixedValue=1
        Constant LeafDetachmentTime: FixedValue=365
        Constant DMRetranslocationFactor: FixedValue=0
        Constant NRetranslocationFactor: FixedValue=0
        RUEModel Photosynthesis
          Constant RUE: FixedValue=2
          WeightedTemperatureFunction FT: MaximumTemperatureWeighting=0.5
            XYPairs: X=[8, 20, 35, 50]; Y=[0, 1, 1, 0]
          LinearInterpolationFunction FVPD: XProperty=[Leaf].Photosynthesis.VPD
            XYPairs: X=[0, 10, 50]; Y=[1, 1, 1]
          LinearInterpolationFunction FN: XProperty=[Leaf].Fn
            XYPairs: X=[0, 1, 1.5]; Y=[0, 1, 1]
          LinearInterpolationFunction FW: XProperty=[Leaf].Fw
            XYPairs: X=[0, 1, 1.5]; Y=[0, 1, 1]
          RUECO2Function FCO2: PhotosyntheticPathway=C3
          Memo
            Ayaz eta 2004 presented a RUE of 1.6 g/MJ PAR during non-limiting temperature conditions for field pea.  Halving this to make it total radiation gives 0.8 g/MJ and adding 20% to account for root and  nodule production and N fixiation costs gives 1.0 g/MJ
          VariableReference RadnInt: VariableName=[Leaf].RadIntTot
        LinearInterpolationFunction LeafKillFraction: XProperty=[Weather].MinT
          XYPairs: X=[0, 3]; Y=[1, 0]
        Constant MinimumLAI: FixedValue=0.1; Units=m2/m2
        MultiplyFunction LAIDeadFunction
          VariableReference DeadLeafWt: VariableName=[Leaf].Dead.Wt
          LinearInterpolationFunction SLA: XProperty=[Bambatsi].Age.Value()
            XYPairs: X=[0, 1]; Y=[0.015, 0.015]
        Constant ExtinctionCoefficientDead: same as Replacements.Bambatsi.Leaf.ExtinctionCoefficient
        LinearInterpolationFunction SpecificLeafAreaFunction: XProperty=[Bambatsi].Age.Value()
          XYPairs: X=[0, 1]; Y=[0.0175, 0.0125]
        Constant CarbonConcentration: FixedValue=0.4
        Constant LeafDevelopmentRate: FixedValue=1
        BiomassDemand DMDemands
          MultiplyFunction Structural
            PartitionFractionDemandFunction DMDemandFunction
              MultiplyFunction PartitionFraction
                LinearInterpolationFunction PotentialFraction: XProperty=[Bambatsi].Age.Value()
                  XYPairs: X=[0, 0.5, 0.66, 5]; Y=[0.33, 0.33, 0.52, 0.52]
                LinearInterpolationFunction PhotoperiodEffect: XProperty=[Bambatsi].Photoperiod.Value()
                  XYPairs: X=[10, 12, 13, 16]; Y=[1, 1, 1, 1]
            Constant StructuralFraction: FixedValue=1; Units=0-1
          Constant Metabolic: FixedValue=0
          StorageDMDemandFunction Storage
            SubtractFunction StorageFraction
              Constant One: FixedValue=1
              VariableReference StructuralFraction: VariableName=[Leaf].DMDemands.Structural.StructuralFraction.Value()
        BiomassDemand NDemands
          MultiplyFunction Structural
            VariableReference MinNconc: VariableName=[Leaf].minimumNconc.Value()
            VariableReference PotentialDMAllocation: VariableName=[Leaf].potentialDMAllocation.Structural
          MultiplyFunction Metabolic
            SubtractFunction MetabolicNconc
              VariableReference CritNconc: VariableName=[Leaf].criticalNConc.Value()
              VariableReference MinNconc: VariableName=[Leaf].minimumNconc.Value()
            VariableReference PotentialDMAllocation: VariableName=[Leaf].potentialDMAllocation.Structural
          StorageNDemandFunction Storage
            VariableReference NitrogenDemandSwitch: VariableName=[Leaf].nitrogenDemandSwitch.Value()
            VariableReference MaxNconc: VariableName=[Leaf].maximumNconc.Value()
        Constant StomatalConductanceCO2Modifier: FixedValue=1
      Root: GrowthRespiration=0; MaintenanceRespiration=0; RootAngle=45; SWAvailabilityRatio=0
        PhaseBasedSwitch NitrogenDemandSwitch: Start=Emergence; End=Old
        Constant RootFrontVelocity: FixedValue=20
        Constant SenescenceRate: FixedValue=0.005
        Constant MaximumNConc: FixedValue=0.01
        Constant MaxDailyNUptake: FixedValue=6
        Constant MinimumNConc: FixedValue=0.008
        Constant MaximumRootDepth: FixedValue=1000000
        LinearInterpolationFunction KLModifier: XProperty=[Leaf].LAI
          XYPairs: X=[0, 3]; Y=[1, 1]
        LinearInterpolationFunction KNO3: XProperty=[Root].LengthDensity
          XYPairs: X=[0, 0.003]; Y=[0.03, 0.03]
        LinearInterpolationFunction KNH4: XProperty=[Root].LengthDensity
          XYPairs: X=[0, 0.003]; Y=[0, 0]
        LinearInterpolationFunction NUptakeSWFactor: XProperty=[Root].RWC
          XYPairs: X=[0, 0.5, 1]; Y=[1, 1, 1]
        Constant InitialDM: FixedValue=0.02; Units=g/plant
        Constant SpecificRootLength: FixedValue=100; Units=m/g
        BiomassRemoval BiomassRemovalDefaults
          OrganBiomassRemovalType Harvest: FractionLiveToRemove=0; FractionDeadToRemove=0; FractionLiveToResidue=0; FractionDeadToResidue=0
          OrganBiomassRemovalType Cut: FractionLiveToRemove=0; FractionDeadToRemove=0; FractionLiveToResidue=0.3; FractionDeadToResidue=0
          OrganBiomassRemovalType Prune: FractionLiveToRemove=0; FractionDeadToRemove=0; FractionLiveToResidue=0.1; FractionDeadToResidue=0
          OrganBiomassRemovalType Graze: FractionLiveToRemove=0; FractionDeadToRemove=0; FractionLiveToResidue=0.15; FractionDeadToResidue=0
          OrganBiomassRemovalType Thin: FractionLiveToRemove=0; FractionDeadToRemove=0; FractionLiveToResidue=0.05; FractionDeadToResidue=0
        Constant DMConversionEfficiency: FixedValue=1
        Constant MaintenanceRespirationFunction: FixedValue=1
        Constant RemobilisationCost: FixedValue=0
        Constant CarbonConcentration: FixedValue=0.4
        BiomassDemand DMDemands
          MultiplyFunction Structural
            PartitionFractionDemandFunction DMDemandFunction
              LinearInterpolationFunction PartitionFraction: XProperty=[Bambatsi].Age.Value()
                XYPairs: X=[0, 1, 1.1, 5]; Y=[0.5, 0.5, 0.2, 0.2]
            Constant StructuralFraction: FixedValue=1
          Constant Metabolic: FixedValue=0
          StorageDMDemandFunction Storage
            SubtractFunction StorageFraction
              Constant One: FixedValue=1
              VariableReference StructuralFraction: VariableName=[Root].DMDemands.Structural.StructuralFraction.Value()
        BiomassDemand NDemands
          MultiplyFunction Structural
            VariableReference MinNconc: VariableName=[Root].minimumNconc.Value()
            VariableReference PotentialDMAllocation: VariableName=[Root].potentialDMAllocation.Structural
          MultiplyFunction Metabolic
            SubtractFunction MetabolicNconc
              VariableReference CritNconc: VariableName=[Root].criticalNConc.Value()
              VariableReference MinNconc: VariableName=[Root].minimumNconc.Value()
            VariableReference PotentialDMAllocation: VariableName=[Root].potentialDMAllocation.Structural
          StorageNDemandFunction Storage
            VariableReference NitrogenDemandSwitch: VariableName=[Root].nitrogenDemandSwitch.Value()
            VariableReference MaxNconc: VariableName=[Root].maximumNconc.Value()
      GenericOrgan Stem
        Constant NReallocationFactor: FixedValue=0
        Constant NRetranslocationFactor: FixedValue=0.05
        PhaseBasedSwitch NitrogenDemandSwitch: Start=Emergence; End=Old
        Constant DMRetranslocationFactor: FixedValue=0
        Constant SenescenceRate: FixedValue=0; Units=/d
        Constant MaximumNConc: FixedValue=0.0015
        Constant MinimumNConc: FixedValue=0.0014
        Constant InitialWtFunction: FixedValue=0; Units=g/m^2
        Constant DetachmentRateFunction: FixedValue=0; Units=/d
        BiomassRemoval BiomassRemovalDefaults
          OrganBiomassRemovalType Harvest: FractionLiveToRemove=0.9; FractionDeadToRemove=0.9; FractionLiveToResidue=0; FractionDeadToResidue=0
          OrganBiomassRemovalType Cut: FractionLiveToRemove=0.8; FractionDeadToRemove=0; FractionLiveToResidue=0; FractionDeadToResidue=0
          OrganBiomassRemovalType Prune: FractionLiveToRemove=0.9; FractionDeadToRemove=0.9; FractionLiveToResidue=0.1; FractionDeadToResidue=0.1
          OrganBiomassRemovalType Graze: FractionLiveToRemove=0.6; FractionDeadToRemove=0; FractionLiveToResidue=0.2; FractionDeadToResidue=0
          OrganBiomassRemovalType Thin: FractionLiveToRemove=0; FractionDeadToRemove=0; FractionLiveToResidue=0.05; FractionDeadToResidue=0
        Constant MaintenanceRespirationFunction: FixedValue=0; Units=0-1
        Constant DMConversionEfficiency: FixedValue=1; Units=0-1
        Constant DMReallocationFactor: FixedValue=0
        VariableReference CriticalNConc: VariableName=[Stem].MinimumNConc.Value()
        Constant RemobilisationCost: FixedValue=0
        Constant CarbonConcentration: FixedValue=0.4
        BiomassDemand DMDemands
          MultiplyFunction Structural
            PartitionFractionDemandFunction DMDemandFunction
              LinearInterpolationFunction PartitionFraction: XProperty=[Bambatsi].Age.Value()
                XYPairs: X=[0, 1, 1.1, 5]; Y=[0.17, 0.17, 0.27, 0.27]
            Constant StructuralFraction: FixedValue=1; Units=g/g
          Constant Metabolic: FixedValue=0
          StorageDMDemandFunction Storage
            SubtractFunction StorageFraction
              Constant One: FixedValue=1
              VariableReference StructuralFraction: VariableName=[Stem].DMDemands.Structural.StructuralFraction.Value()
        BiomassDemand NDemands
          MultiplyFunction Structural
            VariableReference MinNconc: VariableName=[Stem].minimumNconc.Value()
            VariableReference PotentialDMAllocation: VariableName=[Stem].potentialDMAllocation.Structural
          MultiplyFunction Metabolic
            SubtractFunction MetabolicNconc
              VariableReference CritNconc: VariableName=[Stem].criticalNConc.Value()
              VariableReference MinNconc: VariableName=[Stem].minimumNconc.Value()
            VariableReference PotentialDMAllocation: VariableName=[Stem].potentialDMAllocation.Structural
          StorageNDemandFunction Storage
            VariableReference NitrogenDemandSwitch: VariableName=[Stem].nitrogenDemandSwitch.Value()
            VariableReference MaxNconc: VariableName=[Stem].maximumNconc.Value()
      Cultivar Bambatsi
    Nutrient NutrientOLD
      DirectedGraphInfo={Nodes=[{Name=Inert, OutlineColour=Black}, {Name=SurfaceResidue, OutlineColour=Black}, {Name=FOMLignin, OutlineColour=Black}, {Name=FOMCellulose, OutlineColour=Black}, {Name=FOMCarbohydrate, OutlineColour=Black}, {Name=Microbial, OutlineColour=Black}, {Name=Humic, OutlineColour=Black}, {Name=Urea, OutlineColour=Black}, {Name=NO3, OutlineColour=Black}, {Name=NH4, OutlineColour=Black}, {Name=Atmosphere, OutlineColour=White}, {Name=PlantAvailableNO3, OutlineColour=Black}, {Name=PlantAvailableNH4, OutlineColour=Black}], Arcs=[{SourceName=SurfaceResidue, DestinationName=Microbial}, {SourceName=SurfaceResidue, DestinationName=Humic}, {SourceName=FOMLignin, DestinationName=Microbial}, {SourceName=FOMLignin, DestinationName=Humic}, {SourceName=FOMCellulose, DestinationName=Microbial}, {SourceName=FOMCellulose, DestinationName=Humic}, {SourceName=FOMCarbohydrate, DestinationName=Microbial}, {SourceName=FOMCarbohydrate, DestinationName=Humic}, {SourceName=Microbial, DestinationName=Microbial}, {SourceName=Microbial, DestinationName=Humic}, {SourceName=Humic, DestinationName=Microbial}, {SourceName=Urea, DestinationName=NH4}, {SourceName=NO3, DestinationName=Atmosphere}, {SourceName=NH4, DestinationName=NO3}]}
      NutrientPool Inert
        Memo
          The inert pool captures organic matter that either does not decompose, or decomposes at a rate slow enough to be of little importance to simulations.  Such as approach was also captured in the APSIM SoilN model ([probert_apsims_1998]).
        ExpressionFunction InitialCarbon
          Expression=[Soil].FInert * [Soil].OC * 100 * [Soil].BD * [Soil].Thickness
          Memo
            Initial C (kg/ha) is calculated from measured soil organic C, bulk density and layer thickness.
        ExpressionFunction InitialNitrogen: Expression=[Inert].C / [Soil].SoilOrganicMatter.SoilCN
          Memo
            Initial N (kg/ha) is calculated with the assumption that the inert pool has the same C:N ratio as the bulk soil.
      NutrientPool SurfaceResidue
        Constant InitialCarbon: FixedValue=0
        Constant InitialNitrogen: FixedValue=0
        CarbonFlow Decomposition: destinationNames=[Microbial, Humic]; destinationFraction=[0.9, 0.1]
          Constant Rate: FixedValue=1
          Constant CO2Efficiency: FixedValue=0.4
          Constant N2OFraction: FixedValue=0
      Solute Urea
        Memo
          This pool simulates the urea content of each soil layer.  Much of the capability has been taken from implementation in the APSIM SoilN model ([probert_apsims_1998]), which was derived from approaches in CERES-Maize [jones_ceres-maize:_1986].
        NFlow Hydrolysis: sourceName=Urea; destinationName=NH4
          Constant NLoss: FixedValue=0
          MultiplyFunction Rate
            BoundFunction PotentialRate
              Constant Upper: FixedValue=1
              Constant Lower: FixedValue=0.25
              ExpressionFunction Rate
                Expression=-1.12 + 1.31 * [Soil].OC + 0.203 * [Soil].PH - 0.155 * [Soil].OC * [Soil].PH
            MinimumFunction RateModifier
              BoundFunction WF
                Constant Upper: FixedValue=1
                Constant Lower: FixedValue=0
                ExpressionFunction Wfactor: Expression=[WaterFactorForMineralisation]+0.2
              BoundFunction TF
                Constant Upper: FixedValue=1
                Constant Lower: FixedValue=0
                ExpressionFunction Tfactor: Expression=([Soil].Temperature/40)+0.2
          Constant N2OFraction: FixedValue=0
      Solute NO3
        Memo
          This pool simulates the nitrate content of each soil layer.  Much of the capability has been taken from implementation in the APSIM SoilN model ([probert_apsims_1998]), which was derived from approaches in CERES-Maize [jones_ceres-maize:_1986].
        NFlow Denitrification: sourceName=NO3
          Memo
            Denitrification is simulated using the approaches initially used in CERES Maize[jones_ceres-maize:_1986] as implemented in APSIM SoilN ([probert_apsims_1998]).  These were based upon the work of [Rolston1984].  Denitrification rate is calculated using this approach to account for the effect of soil carbon, temperature and water on the fraction of nitrate lost on a daily basis.
          Constant NLoss: FixedValue=1
          MultiplyFunction Rate
            Constant: FixedValue=0.0006
            ExpressionFunction ActiveC: Expression=0.0031 * [TotalCppm] + 24.5
              Memo
                Denitrification rate is affected by soil carbon content using an approach originally described by [Reddy1980].
              ExpressionFunction TotalCppm
                Expression=([Humic].C+[Inert].C+[FOMCarbohydrate].C+[FOMCellulose].C+[FOMLignin].C)/[ppm2kgha]
            BoundFunction TF
              Constant Upper: FixedValue=1
              Constant Lower: FixedValue=0
              ExpressionFunction Tfactor: Expression=0.1 * Exp(0.046 * [Soil].Temperature)
            LinearInterpolationFunction WF: XProperty=[SoilWaterScale]
              SoilWaterScale
              XYPairs: X=[0, 1, 2]; Y=[0, 0, 1]
          ExpressionFunction N2OFraction: Expression=1 / ([N2N2ORatio].Value() + 1)
            MinimumFunction N2N2ORatio
              Constant Zero: FixedValue=1
              MultiplyFunction Ratio
                Constant: FixedValue=25.1
                LinearInterpolationFunction WFPSEffect: XProperty=[SoilWaterScale]
                  XYPairs: X=[0, 28, 88, 100]; Y=[0.1, 0.1, 1, 1.18]
                MinimumFunction CO2Effect
                  Constant: FixedValue=0.16
                  ExpressionFunction Effect: Expression=Math.Exp(-0.8 * [Nutrient].NO3.kgha / [Nutrient].Catm)
      NutrientPool FOMLignin
        Memo
          The FOMLignin pool captures "lignin-like" material within fresh organic matter (FOM).  Such as approach was also captured in the APSIM SoilN model ([probert_apsims_1998]) and in CERES Maize[jones_ceres-maize:_1986]. This pool has the slowest decomposition rate of the three FOM pools.
        ExpressionFunction InitialCarbon: Expression=[Soil].InitialRootWt * 0.1 * 0.4
        ExpressionFunction InitialNitrogen: Expression=[FOMLignin].C / [Soil].SoilOrganicMatter.RootCN
        CarbonFlow Decomposition: destinationNames=[Microbial, Humic]; destinationFraction=[0.9, 0.1]
          MultiplyFunction Rate
            Constant PotentialRate: FixedValue=0.0095
            VariableReference TF: VariableName=[TemperatureFactorForMineralisation]
            VariableReference WF: VariableName=[WaterFactorForMineralisation]
            VariableReference CNRF: VariableName=[CNRatioFactorForMineralisation]
          Constant CO2Efficiency: FixedValue=0.4
      NutrientPool FOMCellulose
        Memo
          The FOMCellulose pool captures "cellulose-like" material within fresh organic matter (FOM).  Such as approach was also captured in the APSIM SoilN model ([probert_apsims_1998]) and in CERES Maize[jones_ceres-maize:_1986].
        ExpressionFunction InitialCarbon: Expression=[Soil].InitialRootWt * 0.7 * 0.4
        ExpressionFunction InitialNitrogen: Expression=[FOMCellulose].C / [Soil].SoilOrganicMatter.RootCN
        CarbonFlow Decomposition: destinationNames=[Microbial, Humic]; destinationFraction=[0.9, 0.1]
          MultiplyFunction Rate
            Constant PotentialRate: FixedValue=0.05
            VariableReference TF: VariableName=[TemperatureFactorForMineralisation]
            VariableReference WF: VariableName=[WaterFactorForMineralisation]
            VariableReference CNRF: VariableName=[CNRatioFactorForMineralisation]
          Constant CO2Efficiency: FixedValue=0.4
      NutrientPool FOMCarbohydrate
        Memo
          The FOMCarbohydrate pool captures "carbohydrate-like" material within fresh organic matter (FOM).  Such as approach was also captured in the APSIM SoilN model ([probert_apsims_1998]) and in CERES Maize[jones_ceres-maize:_1986]. This pool has the fastest decomposition rate of the three FOM pools.
        ExpressionFunction InitialCarbon: Expression=[Soil].InitialRootWt * 0.2 * 0.4
        ExpressionFunction InitialNitrogen: Expression=[FOMCarbohydrate].C / [Soil].SoilOrganicMatter.RootCN
        CarbonFlow Decomposition: destinationNames=[Microbial, Humic]; destinationFraction=[0.9, 0.1]
          MultiplyFunction Rate
            Constant PotentialRate: FixedValue=0.2
            VariableReference TF: VariableName=[TemperatureFactorForMineralisation]
            VariableReference WF: VariableName=[WaterFactorForMineralisation]
            VariableReference CNRF: VariableName=[CNRatioFactorForMineralisation]
          Constant CO2Efficiency: FixedValue=0.4
      NutrientPool Microbial
        ExpressionFunction InitialCarbon
          Expression=(([Soil].OC * 100 * [Soil].BD * [Soil].Thickness -[Inert].C) * [Soil].FBiom) / (1 + [Soil].FBiom)
        ExpressionFunction InitialNitrogen: Expression=[Microbial].C /  [CNRatio]
        Constant CNRatio: FixedValue=8
        CarbonFlow Decomposition: destinationNames=[Microbial, Humic]; destinationFraction=[0.6, 0.4]
          MultiplyFunction Rate
            Constant PotentialRate: FixedValue=0.0081
            VariableReference TF: VariableName=[TemperatureFactorForMineralisation]
            VariableReference WF: VariableName=[WaterFactorForMineralisation]
          Constant CO2Efficiency: FixedValue=0.4
      NutrientPool Humic
        ExpressionFunction InitialCarbon
          Expression=(1-[Soil].FInert)*[Soil].OC * 100 * [Soil].BD * [Soil].Thickness - [Microbial].C
        ExpressionFunction InitialNitrogen: Expression=[Humic].C / [Soil].SoilOrganicMatter.SoilCN
        CarbonFlow Decomposition: destinationNames=[Microbial]; destinationFraction=[1]
          MultiplyFunction Rate
            Constant PotentialRate: FixedValue=0.00015
            VariableReference TF: VariableName=[TemperatureFactorForMineralisation]
            VariableReference WF: VariableName=[WaterFactorForMineralisation]
          Constant CO2Efficiency: FixedValue=0.4
      Solute NH4
        NFlow Nitrification: sourceName=NH4; destinationName=NO3
          Constant NLoss: FixedValue=0
          MultiplyFunction Rate
            ExpressionFunction MichaelisMenton: Expression=40/([Nutrient].NH4.ppm+90)
            MinimumFunction PNI
              LinearInterpolationFunction WF: XProperty=[SoilWaterScale]
                SoilWaterScale
                XYPairs: X=[0, 0.25, 1, 2]; Y=[0, 1, 1, 0]
              VariableReference TF: VariableName=[TemperatureFactorForMineralisation]
              LinearInterpolationFunction pHF: XProperty=[Soil].PH
                XYPairs: X=[4.5, 6, 8, 9]; Y=[0, 1, 1, 0]
          Constant N2OFraction: FixedValue=0
      MinimumFunction TemperatureFactorForMineralisation
        ExpressionFunction TF: Expression=([AbsT]^2)/([Topt]^2)
          Constant Topt: FixedValue=32
          MaximumFunction AbsT
            Constant Zero: FixedValue=0
            VariableReference: VariableName=[Soil].Temperature
        Constant One: FixedValue=1
      StringComparisonFunction WaterFactorForMineralisation: PropertyName=[Soil].SoilType; StringValue=Sand
        LinearInterpolationFunction TrueValue: XProperty=[SoilWaterScale]
          SoilWaterScale
          XYPairs: X=[0, 0.5, 1, 2]; Y=[0.05, 1, 1, 0.5]
        LinearInterpolationFunction FalseValue: XProperty=[SoilWaterScale]
          SoilWaterScale
          XYPairs: X=[0, 0.5, 1, 2]; Y=[0, 1, 1, 0.5]
      MinimumFunction CNRatioFactorForMineralisation
        Constant One: FixedValue=1
        ExpressionFunction CNRF: Expression=Exp(-0.693*([Nutrient].FOMCNR-25)/25)
      ExpressionFunction ppm2kgha: Expression=([Soil].BD*[Soil].Thickness)/100
      ExpressionFunction FOMCx: Expression=[FOMLignin].C+[FOMCellulose].C+[FOMCarbohydrate].C
      ExpressionFunction FOMNx: Expression=[FOMLignin].N+[FOMCellulose].N+[FOMCarbohydrate].N
      Solute PlantAvailableNO3
        Memo
          This pool simulates the nitrate content of each soil layer.  Much of the capability has been taken from implementation in the APSIM SoilN model ([probert_apsims_1998]), which was derived from approaches in CERES-Maize [jones_ceres-maize:_1986].
      Solute PlantAvailableNH4
        Memo
          This pool simulates the nitrate content of each soil layer.  Much of the capability has been taken from implementation in the APSIM SoilN model ([probert_apsims_1998]), which was derived from approaches in CERES-Maize [jones_ceres-maize:_1986].
    Nutrient
      DirectedGraphInfo={Nodes=[{Name=Inert, OutlineColour=Black}, {Name=SurfaceResidue, OutlineColour=Black}, {Name=FOMLignin, OutlineColour=Black}, {Name=FOMCellulose, OutlineColour=Black}, {Name=FOMCarbohydrate, OutlineColour=Black}, {Name=Microbial, OutlineColour=Black}, {Name=Humic, OutlineColour=Black}, {Name=Urea, OutlineColour=Black}, {Name=NO3, OutlineColour=Black}, {Name=NH4, OutlineColour=Black}, {Name=Atmosphere, OutlineColour=White}, {Name=PlantAvailableNO3, OutlineColour=Black}, {Name=PlantAvailableNH4, OutlineColour=Black}], Arcs=[{SourceName=SurfaceResidue, DestinationName=Microbial}, {SourceName=SurfaceResidue, DestinationName=Humic}, {SourceName=FOMLignin, DestinationName=Microbial}, {SourceName=FOMLignin, DestinationName=Humic}, {SourceName=FOMCellulose, DestinationName=Microbial}, {SourceName=FOMCellulose, DestinationName=Humic}, {SourceName=FOMCarbohydrate, DestinationName=Microbial}, {SourceName=FOMCarbohydrate, DestinationName=Humic}, {SourceName=Microbial, DestinationName=Microbial}, {SourceName=Microbial, DestinationName=Humic}, {SourceName=Humic, DestinationName=Microbial}, {SourceName=Urea, DestinationName=NH4}, {SourceName=NO3, DestinationName=Atmosphere}, {SourceName=NH4, DestinationName=NO3}]}
      NutrientPool Inert
        Memo
          The inert pool captures organic matter that either does not decompose, or decomposes at a rate slow enough to be of little importance to simulations.  Such an approach was also captured in the APSIM SoilN model ([probert_apsims_1998]).
        ExpressionFunction InitialCarbon
          Expression=[Soil].FInert * [Soil].OC * 100 * [Soil].BD * [Soil].Thickness
          Memo
            Initial C (kg/ha) is calculated as an assumed inert fraction of the measured bulk soil organic C, bulk density and layer thickness.
        ExpressionFunction InitialNitrogen: Expression=[Inert].C / [Soil].SoilOrganicMatter.SoilCN
          Memo
            Initial N (kg/ha) is calculated with the assumption that the inert pool has the same C:N ratio as the bulk soil.
      NutrientPool SurfaceResidue
        Memo
          This pool is used to provide the information about potential flows of Carbon and nutrients from the surface organic matter model to the soil nutrient model.  The potential daily flows of C and nutrients is provided to this pool at run time. Matter not decomposed is returned to the surface organic matter model.  Such an approach was also captured in the APSIM SoilN model ([probert_apsims_1998]). This implementation is currently used to reproduce original functionality and should be refactored at some time in the future.
        Constant InitialCarbon: FixedValue=0
        Constant InitialNitrogen: FixedValue=0
        CarbonFlow Decomposition: destinationNames=[Microbial, Humic]; destinationFraction=[0.9, 0.1]
          Memo
            The soil nutrient model will attempt to decompose all potentially decomposable surface organic materials.
          Constant Rate: FixedValue=1
          Constant CO2Efficiency: FixedValue=0.4
          Constant N2OFraction: FixedValue=0
      Solute Urea
        Memo
          This pool simulates the urea content of each soil layer.  Much of the capability has been taken from implementation in the APSIM SoilN model ([probert_apsims_1998]), which was derived from approaches in CERES-Maize ([jones_ceres-maize:_1986]).
        NFlow Hydrolysis: sourceName=Urea; destinationName=NH4
          Memo
            The nitrogen flow captures the conversion of urea to ammonium by urease enzymes from soil bacteria.
          Constant NLoss: FixedValue=0
          MultiplyFunction Rate: same as Replacements.NutrientOLD.Urea.Hydrolysis.Rate
          Constant N2OFraction: FixedValue=0
      Solute NO3
        Memo
          This pool simulates the nitrate content of each soil layer.  Much of the capability has been taken from implementation in the APSIM SoilN model ([probert_apsims_1998]), which was derived from approaches in CERES-Maize ([jones_ceres-maize:_1986]).
        NFlow Denitrification: sourceName=NO3
          Memo
            Denitrification is simulated using the approaches initially used in CERES Maize ([jones_ceres-maize:_1986]) as implemented in APSIM SoilN ([probert_apsims_1998]).  These were based upon the work of [Rolston1984].  Denitrification rate is calculated using this approach to account for the effect of soil carbon, temperature and water on the fraction of nitrate lost on a daily basis.
          Constant NLoss: FixedValue=1
          MultiplyFunction Rate: same as Replacements.NutrientOLD.NO3.Denitrification.Rate
          ExpressionFunction N2OFraction: Expression=1 / ([N2N2ORatio].Value() + 1)
            Memo
              The emission of N2O during denitrification is calculated from an N2:N2O ratio using the approach from the DayCent model ([PARTON1998]) as previously tested in APSIM ([THORBURN2010]).
            MinimumFunction N2N2ORatio: same as Replacements.NutrientOLD.NO3.Denitrification.N2OFraction.N2N2ORatio
      NutrientPool FOMLignin
        Memo
          The FOMLignin pool captures "lignin-like" material within fresh organic matter (FOM).  Such as approach was also captured in the APSIM SoilN model ([probert_apsims_1998]) and in CERES Maize[jones_ceres-maize:_1986]. This pool has the slowest decomposition rate of the three FOM pools.
        ExpressionFunction InitialCarbon: Expression=[Soil].InitialRootWt * 0.1 * 0.4
          Memo
            This C in this pool is initialised as a set fraction of the initial root residue mass at initialisation.  This mass is assumed to be 40% Carbon.
        ExpressionFunction InitialNitrogen: Expression=[FOMLignin].C / [Soil].SoilOrganicMatter.RootCN
          Memo
            It is assumed that the C:N ratio of this pool is the same as the C:N of the total root residue material.
        CarbonFlow Decomposition: destinationNames=[Microbial, Humic]; destinationFraction=[0.9, 0.1]
          MultiplyFunction Rate
            Constant PotentialRate: FixedValue=0.0095
            CERESMineralisationTemperatureFactor TF
            VariableReference WF: VariableName=[WaterFactorForMineralisation]
            VariableReference CNRF: VariableName=[CNRatioFactorForMineralisation]
          Constant CO2Efficiency: FixedValue=0.4
      NutrientPool FOMCellulose
        Memo
          The FOMCellulose pool captures "cellulose-like" material within fresh organic matter (FOM).  Such as approach was also captured in the APSIM SoilN model ([probert_apsims_1998]) and in CERES Maize[jones_ceres-maize:_1986].
        ExpressionFunction InitialCarbon: Expression=[Soil].InitialRootWt * 0.7 * 0.4
          Memo
            This C in this pool is initialised as a set fraction of the initial root residue mass at initialisation.  This mass is assumed to be 40% Carbon.
        ExpressionFunction InitialNitrogen: Expression=[FOMCellulose].C / [Soil].SoilOrganicMatter.RootCN
          Memo
            It is assumed that the C:N ratio of this pool is the same as the C:N of the total root residue material.
        CarbonFlow Decomposition: destinationNames=[Microbial, Humic]; destinationFraction=[0.9, 0.1]
          MultiplyFunction Rate
            Constant PotentialRate: FixedValue=0.05
            CERESMineralisationTemperatureFactor TF
            VariableReference WF: VariableName=[WaterFactorForMineralisation]
            VariableReference CNRF: VariableName=[CNRatioFactorForMineralisation]
          Constant CO2Efficiency: FixedValue=0.4
      NutrientPool FOMCarbohydrate
        Memo
          The FOMCarbohydrate pool captures "carbohydrate-like" material within fresh organic matter (FOM).  Such as approach was also captured in the APSIM SoilN model ([probert_apsims_1998]) and in CERES Maize[jones_ceres-maize:_1986]. This pool has the fastest decomposition rate of the three FOM pools.
        ExpressionFunction InitialCarbon: Expression=[Soil].InitialRootWt * 0.2 * 0.4
          Memo
            This C in this pool is initialised as a set fraction of the initial root residue mass at initialisation.  This mass is assumed to be 40% Carbon.
        ExpressionFunction InitialNitrogen: Expression=[FOMCarbohydrate].C / [Soil].SoilOrganicMatter.RootCN
          Memo
            It is assumed that the C:N ratio of this pool is the same as the C:N of the total root residue material.
        CarbonFlow Decomposition: destinationNames=[Microbial, Humic]; destinationFraction=[0.9, 0.1]
          MultiplyFunction Rate
            Constant PotentialRate: FixedValue=0.2
            CERESMineralisationTemperatureFactor TF
            VariableReference WF: VariableName=[WaterFactorForMineralisation]
            VariableReference CNRF: VariableName=[CNRatioFactorForMineralisation]
          Constant CO2Efficiency: FixedValue=0.4
      NutrientPool Microbial
        Memo
          The microbial pool (formally Biom pool in APSIM SoilNitrogen) represents the more labile, soil microbial biomass and microbial products.
        ExpressionFunction InitialCarbon
          Expression=(([Soil].OC * 100 * [Soil].BD * [Soil].Thickness -[Inert].C) * [Soil].FBiom) / (1 + [Soil].FBiom)
          Memo
            Initial C (kg/ha) is calculated as an assumed biomass fraction of the non-inert soil organic C, bulk density and layer thickness.
        ExpressionFunction InitialNitrogen: Expression=[Microbial].C /  [CNRatio]
          Memo
            Initial N (kg/ha) is calculated with the assumption that microbial biomass maintains a constant C:N ratio.
        Constant CNRatio: FixedValue=8
        CarbonFlow Decomposition: destinationNames=[Microbial, Humic]; destinationFraction=[0.6, 0.4]
          Memo
            Decomposition of this pool is calculated as a first-order process with rate constants modified by factors such as soil temperature and moisture. There is also an internal cycling of carbon and nitrogen (ie microbes feeding on microbial products).
          MultiplyFunction Rate
            StringComparisonFunction PotentialRate: PropertyName=[Soil].SoilType; StringValue=Sand
              Memo
                The default potential decomposition rate comes from SoilN ([probert_apsims_1998]). For sandy soils, the rate is modified as per [Asseng1998163].
              Constant TrueValue: FixedValue=0.0324
              Constant FalseValue: FixedValue=0.0081
            CERESMineralisationTemperatureFactor TF
            VariableReference WF: VariableName=[WaterFactorForMineralisation]
          Constant CO2Efficiency: FixedValue=0.4
      NutrientPool Humic
        Memo
          The humic pool represents the largest soil organic matter pool consisting of organic matter with much lower decomposition rate.
        ExpressionFunction InitialCarbon
          Expression=(1-[Soil].FInert)*[Soil].OC * 100 * [Soil].BD * [Soil].Thickness - [Microbial].C
          Memo
            Initial C (kg/ha) is calculated as that component of the total soil carbon that has not been already attributed to the other soil carbon pools.
        ExpressionFunction InitialNitrogen: Expression=[Humic].C / [Soil].SoilOrganicMatter.SoilCN
          Memo
            Initial N (kg/ha) is calculated with the assumption that the inert pool has the same C:N ratio as the bulk soil.
        CarbonFlow Decomposition: destinationNames=[Microbial]; destinationFraction=[1]
          Memo
            Decomposition of this pool is calculated as a first-order process with rate constants modified by factors such as soil temperature and moisture.
          MultiplyFunction Rate
            Constant PotentialRate: FixedValue=0.00015
            CERESMineralisationTemperatureFactor TF
            VariableReference WF: VariableName=[WaterFactorForMineralisation]
          Constant CO2Efficiency: FixedValue=0.4
      Solute NH4
        NFlow Nitrification: sourceName=NH4; destinationName=NO3
          Memo
            Denitrification is simulated using the approaches initially used in CERES Maize ([jones_ceres-maize:_1986]) as implemented in APSIM SoilN ([probert_apsims_1998]).
          Constant NLoss: FixedValue=0
          MultiplyFunction Rate
            Memo
              Potential nitrification rate is assumed to follow Michaelis-Menton kinetics. Daily nitrification rate is estimated from this potential rate as affected by soil water, temperature and pH conditions.
            ExpressionFunction MichaelisMenton: Expression=40/([Nutrient].NH4.ppm+90)
            MinimumFunction PNI
              LinearInterpolationFunction WF: XProperty=[SoilWaterScale]
                SoilWaterScale
                XYPairs: X=[0, 0.25, 1, 2]; Y=[0, 1, 1, 0]
              CERESMineralisationTemperatureFactor TF
              LinearInterpolationFunction pHF: XProperty=[Soil].PH
                XYPairs: X=[4.5, 6, 8, 9]; Y=[0, 1, 1, 0]
          Constant N2OFraction: FixedValue=0
            Memo
              Currently, no N2O is assumed to be produced during nitrification processes.
      StringComparisonFunction WaterFactorForMineralisation: same as Replacements.NutrientOLD.WaterFactorForMineralisation
      MinimumFunction CNRatioFactorForMineralisation
        Constant One: FixedValue=1
        ExpressionFunction CNRF: Expression=Exp(-0.693*([Nutrient].FOMCNR-25)/25)
      ExpressionFunction ppm2kgha: Expression=([Soil].BD*[Soil].Thickness)/100
      ExpressionFunction FOMCx: Expression=[FOMLignin].C+[FOMCellulose].C+[FOMCarbohydrate].C
      ExpressionFunction FOMNx: Expression=[FOMLignin].N+[FOMCellulose].N+[FOMCarbohydrate].N
      InitialWater Initial water: PercentMethod=0; FractionFull=0
      Sample Initial conditions: Thickness=[1800]; NO3=[10]; NH4=[1]; NO3Units=kg/ha; NH4Units=kg/ha; SWUnits=Volumetric; OCUnits=Total; PHUnits=Water
      Solute PlantAvailableNO3
        Memo
          This pool simulates the nitrate content of each soil layer.  Much of the capability has been taken from implementation in the APSIM SoilN model ([probert_apsims_1998]), which was derived from approaches in CERES-Maize [jones_ceres-maize:_1986].
      Solute PlantAvailableNH4
        Memo
          This pool simulates the nitrate content of each soil layer.  Much of the capability has been taken from implementation in the APSIM SoilN model ([probert_apsims_1998]), which was derived from approaches in CERES-Maize [jones_ceres-maize:_1986].
  DataStore
    ExcelInput Observed: FileName=observed.xlsx; SheetNames=[ObsCrop, ObsSoil]
    PredictedObserved: PredictedTableName=HarvestReport; ObservedTableName=ObsCrop; FieldNameUsedForMatch=Clock.Today.Year
    PredictedObserved PredictedObservedSoil: PredictedTableName=Report; ObservedTableName=ObsSoil; FieldNameUsedForMatch=Clock.Today
      Tests: POName=PredictedObservedSoil
        AcceptedStats:
          Name        n    Slope     Intercept  SEslope    SEintercept  R2        RMSE     NSE       ME        MAE      RSR
          N           144  1         0          0          0            1         0        1         0         0        0
          TOC0_10cm   148  0.787354  3559.09    0.0325311  504.256      0.80049   1698.19  0.790935  358.923   1263.11  0.455689
          TOC0_30cm   199  0.680757  12300.3    0.0230026  866.017      0.816377  3501.06  0.78901   530.145   2450.13  0.458181
          TOC10_30cm  117  0.156964  15969.8    0.024549   435.916      0.262262  2737.83  0.039637  1186.44   2282.74  0.975784
          TOC30_60cm  171  0.855739  4048.06    0.0284017  626.794      0.843055  3367.56  0.824724  1083.37   2640.79  0.417434
          TON0_10cm   9    0.438531  768.361    0.0701909  128.245      0.847937  381.812  0.493882  -212.236  328.688  0.670733
          TON0_30cm   61   0.762884  714.776    0.0828745  292.813      0.58953   283.459  0.441506  -118.161  173.658  0.741174
          TON30_60cm  54   0.875399  21.4469    0.0845756  240.522      0.673228  343.852  -4.9503   -332.467  332.467  2.41663
        AcceptedStatsName=Name n Slope Intercept SEslope SEintercept R2 RMSE NSE ME MAE RSR
  Folder Validation
    Memo Introduction
      The Soil Nutrient model has been tested on a variety of datasets studying the impact of management (tillage, cropping rotation, nitrogen management) on soil carbon, nitrogen and crop productivity for a range of soil types and environments.
    Folder Australia
      Memo
        Insert text here to document the Australian datasets
      Folder Tarlee
        Experiment Tarlee
          Memo
            Insert text here to document the Tarlee dataset
          Factors
            Factor Rotation: Specifications=[operations]
              Operations WW
                1978-07-18  [Wheat].Sow(cultivar:hartog, depth:30, population:100, rowSpacing:300);
                1979-06-21  [Wheat].Sow(cultivar:hartog, depth:30, population:100, rowSpacing:300);
                1980-07-16  [Wheat].Sow(cultivar:hartog, depth:30, population:100, rowSpacing:300);
                1981-07-16  [Wheat].Sow(cultivar:hartog, depth:30, population:100, rowSpacing:300);
                1982-06-07  [Wheat].Sow(cultivar:hartog, depth:30, population:100, rowSpacing:300);
                1983-06-04  [Wheat].Sow(cultivar:hartog, depth:30, population:100, rowSpacing:300);
                1984-06-26  [Wheat].Sow(cultivar:hartog, depth:30, population:100, rowSpacing:300);
                1985-06-11  [Wheat].Sow(cultivar:hartog, depth:30, population:100, rowSpacing:300);
                1986-07-21  [Wheat].Sow(cultivar:hartog, depth:30, population:100, rowSpacing:300);
                1987-06-02  [Wheat].Sow(cultivar:hartog, depth:30, population:100, rowSpacing:300);
                1988-06-23  [Wheat].Sow(cultivar:hartog, depth:30, population:100, rowSpacing:300);
                1989-06-06  [Wheat].Sow(cultivar:hartog, depth:30, population:100, rowSpacing:300);
                1990-07-23  [Wheat].Sow(cultivar:hartog, depth:30, population:100, rowSpacing:300);
                1991-06-26  [Wheat].Sow(cultivar:hartog, depth:30, population:100, rowSpacing:300);
                1992-06-01  [Wheat].Sow(cultivar:hartog, depth:30, population:100, rowSpacing:300);
                1993-06-24  [Wheat].Sow(cultivar:hartog, depth:30, population:100, rowSpacing:300);
                1994-06-24  [Wheat].Sow(cultivar:hartog, depth:30, population:100, rowSpacing:300);
                1995-06-24  [Wheat].Sow(cultivar:hartog, depth:30, population:100, rowSpacing:300);
                1996-06-23  [Wheat].Sow(cultivar:hartog, depth:30, population:100, rowSpacing:300);
              Operations WF
                1979-06-21  [Wheat].Sow(cultivar:hartog, depth:30, population:100, rowSpacing:300);
                1981-07-16  [Wheat].Sow(cultivar:hartog, depth:30, population:100, rowSpacing:300);
                1983-06-04  [Wheat].Sow(cultivar:hartog, depth:30, population:100, rowSpacing:300);
                1985-06-11  [Wheat].Sow(cultivar:hartog, depth:30, population:100, rowSpacing:300);
                1987-06-02  [Wheat].Sow(cultivar:hartog, depth:30, population:100, rowSpacing:300);
                1989-06-06  [Wheat].Sow(cultivar:hartog, depth:30, population:100, rowSpacing:300);
                1991-06-26  [Wheat].Sow(cultivar:hartog, depth:30, population:100, rowSpacing:300);
                1993-06-24  [Wheat].Sow(cultivar:hartog, depth:30, population:100, rowSpacing:300);
                1995-06-24  [Wheat].Sow(cultivar:hartog, depth:30, population:100, rowSpacing:300);
            Factor Stubble: Specifications=[stubbleoperations]
              Operations Burnt
                1978-12-31  [SurfaceOrganicMatter].Incorporate(fraction: 0.90, depth: 0)
                1979-12-31  [SurfaceOrganicMatter].Incorporate(fraction: 0.90, depth: 0)
                1980-12-31  [SurfaceOrganicMatter].Incorporate(fraction: 0.90, depth: 0)
                1981-12-31  [SurfaceOrganicMatter].Incorporate(fraction: 0.90, depth: 0)
                1982-12-31  [SurfaceOrganicMatter].Incorporate(fraction: 0.90, depth: 0)
                1983-12-31  [SurfaceOrganicMatter].Incorporate(fraction: 0.90, depth: 0)
                1984-12-31  [SurfaceOrganicMatter].Incorporate(fraction: 0.90, depth: 0)
                1985-12-31  [SurfaceOrganicMatter].Incorporate(fraction: 0.90, depth: 0)
                1986-12-31  [SurfaceOrganicMatter].Incorporate(fraction: 0.90, depth: 0)
                1987-12-31  [SurfaceOrganicMatter].Incorporate(fraction: 0.90, depth: 0)
                1988-12-31  [SurfaceOrganicMatter].Incorporate(fraction: 0.90, depth: 0)
                1989-12-31  [SurfaceOrganicMatter].Incorporate(fraction: 0.90, depth: 0)
                1990-12-31  [SurfaceOrganicMatter].Incorporate(fraction: 0.90, depth: 0)
                1991-12-31  [SurfaceOrganicMatter].Incorporate(fraction: 0.90, depth: 0)
                1992-12-31  [SurfaceOrganicMatter].Incorporate(fraction: 0.90, depth: 0)
                1993-12-31  [SurfaceOrganicMatter].Incorporate(fraction: 0.90, depth: 0)
                1994-12-31  [SurfaceOrganicMatter].Incorporate(fraction: 0.90, depth: 0)
                1995-12-31  [SurfaceOrganicMatter].Incorporate(fraction: 0.90, depth: 0)
              Operations Incorporated
                1978-12-31  [SurfaceOrganicMatter].Incorporate(fraction: 0.90, depth: 100)
                1979-12-31  [SurfaceOrganicMatter].Incorporate(fraction: 0.90, depth: 100)
                1980-12-31  [SurfaceOrganicMatter].Incorporate(fraction: 0.90, depth: 100)
                1981-12-31  [SurfaceOrganicMatter].Incorporate(fraction: 0.90, depth: 100)
                1982-12-31  [SurfaceOrganicMatter].Incorporate(fraction: 0.90, depth: 100)
                1983-12-31  [SurfaceOrganicMatter].Incorporate(fraction: 0.90, depth: 100)
                1984-12-31  [SurfaceOrganicMatter].Incorporate(fraction: 0.90, depth: 100)
                1985-12-31  [SurfaceOrganicMatter].Incorporate(fraction: 0.90, depth: 100)
                1986-12-31  [SurfaceOrganicMatter].Incorporate(fraction: 0.90, depth: 100)
                1987-12-31  [SurfaceOrganicMatter].Incorporate(fraction: 0.90, depth: 100)
                1988-12-31  [SurfaceOrganicMatter].Incorporate(fraction: 0.90, depth: 100)
                1989-12-31  [SurfaceOrganicMatter].Incorporate(fraction: 0.90, depth: 100)
                1990-12-31  [SurfaceOrganicMatter].Incorporate(fraction: 0.90, depth: 100)
                1991-12-31  [SurfaceOrganicMatter].Incorporate(fraction: 0.90, depth: 100)
                1992-12-31  [SurfaceOrganicMatter].Incorporate(fraction: 0.90, depth: 100)
                1993-12-31  [SurfaceOrganicMatter].Incorporate(fraction: 0.90, depth: 100)
                1994-12-31  [SurfaceOrganicMatter].Incorporate(fraction: 0.90, depth: 100)
                1995-12-31  [SurfaceOrganicMatter].Incorporate(fraction: 0.90, depth: 100)
              Operations Retained
            Factor N: Specifications=[SowingFertiliser].Script.Amount = 0,40,80
          Simulation TarleeBaseSimulation
            Weather: FileName=Tarlee.met
            Clock: StartDate=1978-01-01; EndDate=1996-12-31
            Summary summaryfile
            Zone Field: Area=1; Slope=0
              Operations: same as Validation.Australia.Tarlee.Tarlee.Factors.Rotation.WW
              Operations stubbleoperations
              Report: EventNames=[Clock].EndOfMonth
                VariableNames:
                  [Clock].Today
                  [Soil].Nutrient.TotalC[1] as TOC0_10cm
                  [Soil].Nutrient.TotalC[2] as TOC10_30cm
                  [Soil].Nutrient.TotalC[3] as TOC30_60cm
                  ([Soil].Nutrient.TotalC[1]+[Soil].Nutrient.TotalC[2]) as TOC0_30cm
              Report HarvestReport: EventNames=[Wheat].Harvesting
                VariableNames:
                  [Clock].Today.Year
                  [Wheat].Grain.Wt
                  [Wheat].AboveGround.Wt
                  [Wheat].Grain.Size
              SurfaceOrganicMatter stubble: InitialResidueName=wheat; InitialResidueType=wheat; InitialResidueMass=1000; InitialStandingFraction=0; InitialCPR=0; InitialCNR=80; FractionFaecesAdded=0.5
              Plant wheat: CropType=Wheat; IsEnding=false; DaysAfterEnding=0
                Memo TitlePage
                  # The APSIM Wheat Model

                  _Brown, H.E., Huth, N.I. and Holzworth, D.P._

                  The APSIM wheat model has been developed using the Plant Modelling Framework (PMF) of [brown_plant_2014]. This new framework provides a library of plant organ and process submodels that can be coupled, at runtime, to construct a model in much the same way that models can be coupled to construct a simulation. This means that dynamic composition of lower level process and organ classes (e.g. photosynthesis, leaf) into larger constructions (e.g. maize, wheat, sorghum) can be achieved by the model developer without additional coding.

                  The model consists of:

                  * a phenology model to simulate development between developmental phases
                  * a structure model to simulate plant morphology
                  * a collection of organs to simulate the various plant parts
                  * an arbitrator to allocate resources (N, biomass) to the various plant organs
                OrganArbitrator Arbitrator
                  RelativeAllocation NArbitrator
                  RelativeAllocation DMArbitrator
                Phenology
                  Memo
                    Wheat exhibits a range of developmental responses to environment and these are strongly influences by genotype characteristics.
                    Temperature effects development increasing development rates and decreasing phase durations as temperatures increase.  Theset affects are captured by thermal time, .  However, wheat also exhibits vernalisation and photoperiod sensitivities in its Vegetative phase and further photoperiod sensitivity in the EarlyReproducivePhase.  Photoperiod responses are seen as a reduction in the length of a phase for a photoperiod sensitive genotype in response to a longer photoperiod.  Vernalisation responses are more complicated as they are driven by temperature but interact with photoperiod.  For vernalisation sensitive varieties (Winter types) exposure to cool temperatures or short photoperiods during the Vegetative phase will reduce the thermal time duration of the vegetative phase.

                    We draw on the Kirby Framework to capture these vernalisation and photoperiod responses.  This framework assumes that the timing of anthesis is a result of the timing of flag leaf and an additional thermal time passage from there to anthesis.  It also assumes the timing of flag leaf is a result of the Final Leaf Number which sets a target, and leaf appearance rate, which sets the rate of progress toward this target.  Leaf appearance rate is a function of Thermal time and a genotype specific Phyllochron which changes with Haun stage as described by [Jamieson_LeafAppearance_1995].

                    Final Leaf Number (FLN) is modeled as the sum of three numbers:

                    FLN = MinLeafNumber + VernalLeaves + PhotoLeaves

                    Where MinLeafNumber is the number of leaves that a wheat crop will produce when vernalisation is satisified early in the crops duration (before 2nd true leaf) and it is grown in a long photoperiod..  VernalLeaves are the number of leaves that are added due to vernalisation effects.  For insensitive varieties this will always be zero but this is potentially a larger number for sensitivie varieties and the number progresively decreases as the crop encounters more vernalisation.  PhotoLeaves are the number of leaves that are added to the minimum leaf number as a result of short day exposure.  For insensitive varieties this will be zero but is potential larger for more sensitivie varieties and decreases as day length increases.  More detailed explinations of the components of phenology are provided below.
                  DivideFunction MeanTemp
                    AddFunction TempSum
                      VariableReference MaxT: VariableName=[IWeather].MaxT
                      VariableReference MinT: VariableName=[IWeather].MinT
                    Constant Two: FixedValue=2
                  AirTemperatureFunction ThermalTime
                    XYPairs: X=[0, 26, 37]; Y=[0, 26, 0]
                    Memo
                      Thermal time determines the rate of developmental progress through many of the crops phases and is used by organs to determing potential growth rates.
                  MultiplyFunction DailyVernalisation
                    Memo
                      Vernalisation responses are based on those described by [Brown_Anthesis_2013].   Vernalisation is assumed to be related to the expression of the Vrn1 Gene.  Its experssion is accumulated daily and daily upregulation as a function of development (DeltaHaunStage) and a TempResponseProfile that declines exponentially from a maximum at 1<sup>o</sup>C to zero at 0<sup>o</sup>C and at 18<sup>o</sup>C.
                    VariableReference DeltaHaunStage: VariableName=[Structure].DeltaHaunStage
                    AirTemperatureFunction TempResponseProfile
                      XYPairs
                        X=[0, 1, 2, 3, 4, 5, 6, 7, 8, 9, 10, 11, 12, 13, 14, 15, 16, 17, 18, 19, 20, 30, 32]
                        Y=[0, 1.205, 1.037, 0.893, 0.768, 0.661, 0.569, 0.49, 0.422, 0.363, 0.312, 0.269, 0.231, 0.199, 0.171, 0.148, 0.127, 0.109, 0.094, 0.081, 0, 0, -0.5]
                  PhotoperiodFunction Photoperiod: Twilight=-6; DayLength=0
                  PhaseLookup PerceivedPhotoPeriod
                    PhaseLookupValue ApexBelowGround: Start=Germination; End=Emergence
                      Constant Photoperiod: FixedValue=0; Units=h
                    PhaseLookupValue ApexAboveGround: Start=Emergence; End=HarvestRipe
                      VariableReference Photoperiod: VariableName=[Phenology].Photoperiod.Value()
                  MinimumFunction Vrn1
                    Memo
                      Vrn1 accumulation begins when Vrn4 experssion is down regulated to zero and stops, assuming vernalisation saturation, at a value of 1
                    Constant Saturation: FixedValue=1; Units=Relative Experssion
                    AccumulateFunction CurrentExpression: StartStageName=Germination; EndStageName=TerminalSpikelet; FractionRemovedOnCut=0; FractionRemovedOnHarvest=0; FractionRemovedOnGraze=0; FractionRemovedOnPrune=0
                      LessThanFunction Vernalisation
                        VariableReference If_Vrn4: VariableName=[Phenology].Vrn4.Value()
                        VariableReference IsLessThanLag: VariableName=[Phenology].VernLag.Value()
                        Constant Return_Zero: FixedValue=0
                        VariableReference elseReturn_Vernalisation: VariableName=[Phenology].DailyVernalisation.Value()
                  MinimumFunction Vrn4
                    VariableReference MaxExpression: VariableName=[Phenology].VernLag.Value()
                    AccumulateFunction CurrentExpression: StartStageName=Germination; EndStageName=TerminalSpikelet; FractionRemovedOnCut=0; FractionRemovedOnHarvest=0; FractionRemovedOnGraze=0; FractionRemovedOnPrune=0
                      VariableReference VernalisationConditioning: VariableName=[Phenology].DailyVernalisation.Value()
                  Constant MinimumLeafNumber: FixedValue=7; Units=Leaves
                    Memo
                      Number of leaves the plant will produce when fully vernalised early and grown in long photoperiod
                  Constant VrnSensitivity: FixedValue=0; Units=Leaves
                    Memo
                      The difference between Inherent earlyness leaf number and the number of leaves produced when the plant is unvernalised and grown in long photoperiod
                  Constant VernLag: FixedValue=1; Units=Unitless
                    Memo
                      The amount of vernalising temperature required before vernalisation response will be evident.  Value of relative to the amount offl vernalisation temperature required from the end of the lag until vernalisation saturation.  A value of 0 means there is no lag, a value of 1 means the lag is the same (in vernal time) as the vernalisation requirement and a value of 2 means the lag is twice as long as the vernalisation response phase
                  Constant PpSensitivity: FixedValue=3; Units=Leaves
                    Memo
                      The reduction in leaf number going from 8 to 16 h Pp
                  Constant EarlyReproductivePpSensitivity: FixedValue=0
                    Memo
                      The phyllochrons duration for the plant to go from flag leaf ligual appearance at 16 h Pp compared to the phyllochron duration for the same phase at 8 h Pp.
                  Constant EarlyReproductiveLongDayBase: FixedValue=2.5
                    Memo
                      The phyllochrons duration for the plant to go from flag leaf ligual appearance at 16 h Pp.
                  GerminatingPhase Germinating: Start=Sowing; End=Germination
                  EmergingPhase Emerging: ShootLag=40; ShootRate=1.5; Start=Germination; End=Emergence; TTForTimeStep=0
                    VariableReference ThermalTime: VariableName=[Phenology].ThermalTime.Value()
                  NodeNumberPhase Vegetative: Start=Emergence; End=TerminalSpikelet
                    VariableReference ThermalTime: VariableName=[Phenology].ThermalTime.Value()
                    VariableReference CompletionNodeNumber: VariableName=[Structure].HaunStageTerminalSpikelet.Value()
                  LeafAppearancePhase StemElongation: Start=TerminalSpikelet; End=FlagLeaf
                    Memo
                      The Final leaf number is fixed at Terminal Spikelet and leaves contune to appear at a rate set by thermal time and phyllochron until flag leaf liguale appears and this phase is completed.
                    VariableReference ThermalTime: VariableName=[Phenology].ThermalTime.Value()
                  GenericPhase EarlyReproductive: Start=FlagLeaf; End=Flowering
                    VariableReference Progression: VariableName=[Phenology].ThermalTime.Value()
                    MultiplyFunction Target
                      VariableReference Phyllochron: VariableName=[Structure].Phyllochron.BasePhyllochron.Value()
                      AddFunction Phyllochrons
                        VariableReference LongDayBase: VariableName=[Phenology].EarlyReproductiveLongDayBase.Value()
                        MultiplyFunction IncreaseDueToShortPhotoPeriod
                          LinearInterpolationFunction PhotoPeriodResponse: XProperty=[Phenology].Photoperiod.Value()
                            XYPairs: X=[11, 16]; Y=[1, 0]
                          VariableReference PpSensitivity: VariableName=[Phenology].EarlyReproductivePpSensitivity.Value()
                  GenericPhase GrainDevelopment: Start=Flowering; End=StartGrainFill
                    Constant Target: FixedValue=120
                    VariableReference Progression: VariableName=[Phenology].ThermalTime.Value()
                  GenericPhase GrainFilling: Start=StartGrainFill; End=EndGrainFill
                    Constant Target: FixedValue=545
                    VariableReference Progression: VariableName=[Phenology].ThermalTime.Value()
                  GenericPhase Maturing: Start=EndGrainFill; End=Maturity
                    Constant Target: FixedValue=35
                    VariableReference Progression: VariableName=[Phenology].ThermalTime.Value()
                  GenericPhase Ripening: Start=Maturity; End=HarvestRipe
                    Constant Target: FixedValue=300
                    VariableReference Progression: VariableName=[Phenology].ThermalTime.Value()
                  EndPhase ReadyForHarvesting: Start=HarvestRipe; End=Unused
                    VariableReference ThermalTime: VariableName=[Phenology].ThermalTime.Value()
                  ZadokPMF Zadok
                  OnEventFunction FlagLeafDAS: SetEvent=FlagLeaf; ReSetEvent=never
                    Memo
                      A function is used to provide flowering date as days after sowing(DAS).
                    Constant PreEventValue: FixedValue=0
                    VariableReference PostEventValue: VariableName=[Phenology].DaysAfterSowing
                  OnEventFunction FloweringDAS: SetEvent=Flowering; ReSetEvent=never
                    Memo
                      A function is used to provide flowering date as days after sowing(DAS).
                    Constant PreEventValue: FixedValue=0
                    VariableReference PostEventValue: VariableName=[Phenology].DaysAfterSowing
                  OnEventFunction MaturityDAS: SetEvent=Maturity; ReSetEvent=never
                    Memo
                      A function is used to provide maturity date as days after sowing(DAS).
                    Constant PreEventValue: FixedValue=0
                    VariableReference PostEventValue: VariableName=[Phenology].DaysAfterSowing
                Structure: CohortInitialisationStage=Germination; LeafInitialisationStage=Emergence
                  VariableReference ThermalTime: VariableName=[Phenology].ThermalTime.Value()
                  MultiplyFunction Phyllochron
                    Memo Rational
                      This is the thermal time between the emergence of leaf tips.  The model used here is based on [Jamieson_SIRIUS_1998] where leaf appearace could be described by a base phyllochron determined between leaves 2 and 7 and a phyllochron that was 70% of base phyllochron for leaves < 2 and 130% of base phyllochron for leaves > 7
                    LinearInterpolationFunction LeafStageFactor: XProperty=[Leaf].AppearedCohortNo
                      XYPairs: X=[0, 2, 3, 7, 8, 11, 12]; Y=[0.75, 0.75, 1, 1, 1.4, 1.4, 1.4]
                    Constant BasePhyllochron: FixedValue=120; Units=oC.d
                    LinearInterpolationFunction PhotoPeriodEffect: XProperty=[Phenology].Photoperiod.Value()
                      XYPairs: X=[8, 12, 14]; Y=[1.6, 1, 1]
                  MultiplyFunction BranchingRate
                    Memo
                      Potential branching rate is determined by the commonly observed pattern of tillering in wheat, in which each tiller emerges with the third leaf on its parent axis (e.g. first tiller emerges at the same time as the third leaf on the main stem, the first secondary tiller appears with the third leaf on tiller 1).  This is described as a simple function of main stem leaf number.
                    PhaseLookup PotentialBranchingRate
                      PhaseLookupValue Vegetative: Start=Emergence; End=TerminalSpikelet
                        LinearInterpolationFunction PotentialBranchingRate: XProperty=[Structure].LeafTipsAppeared
                          XYPairs: X=[1, 2, 3, 4, 5, 6, 7, 8]; Y=[0, 0, 1, 2, 4, 7, 12, 20]
                      PhaseLookupValue Reproductive: Start=TerminalSpikelet; End=HarvestRipe
                        Constant Zero: FixedValue=0
                    MinimumFunction StressFactors
                      LinearInterpolationFunction NitrogenEffect: XProperty=[Arbitrator].FN
                        Memo
                          Inadequate Nitrogen supply is assumed to affect tillering prior to any effect on photosynthesis or leaf size.
                        XYPairs: X=[0.5, 2, 3]; Y=[0, 1, 1]
                      LinearInterpolationFunction CoverEffect: XProperty=[Leaf].CoverTotal
                        Memo
                          Tillering is said to cease once a threshold fraction of incoming radiation has been achieved.  This captures shading effects on tillering described by [evers2006cessation].
                        XYPairs: X=[0, 0.1, 0.25]; Y=[1, 1, 0]
                      LinearInterpolationFunction WaterStressEffect: XProperty=[Root].WaterTensionFactor
                        XYPairs: X=[0, 1]; Y=[0, 1]
                  PhaseLookup BranchMortality
                    PhaseLookupValue MortalityPhase: Start=FlagLeaf; End=Flowering
                      MultiplyFunction Mortality
                        LinearInterpolationFunction MortalityPerDegDay: XProperty=[Structure].MeanTillerGrowthRate.Value()
                          XYPairs: X=[0, 0.005]; Y=[0.002, 0]
                        VariableReference ThermalTime: VariableName=[Phenology].ThermalTime.Value()
                  HeightFunction HeightModel
                    LinearInterpolationFunction PotentialHeight: XProperty=[Phenology].Stage
                      XYPairs: X=[3, 4, 5, 6, 7]; Y=[10, 200, 1000, 1100, 1200]
                    LinearInterpolationFunction WaterStress: XProperty=[Leaf].Fw
                      XYPairs: X=[0.3, 1]; Y=[0, 1]
                  MovingAverageFunction MeanTillerGrowthRate: NumberOfDays=5; StageToStartMovingAverage=Emergence
                    Memo
                      This is calculated to represent the supply of asslimilate to individual tillers over the past 5 days to use as an index to determine tiller mortality.  When tiller numbers are high or total crop assimilate supply is small there will not be enough assimilate to maintain all of the tillers so the model will senesce some.
                    DivideFunction TillerGrowthRate
                      VariableReference DailyGrowth: VariableName=[Arbitrator].DM.TotalFixationSupply
                      VariableReference ThermalTime: VariableName=[Phenology].ThermalTime.Value()
                      VariableReference StemPopulation: VariableName=[Structure].TotalStemPopn
                  MovingAverageFunction MeanPhyllochron: NumberOfDays=300; StageToStartMovingAverage=Emergence
                    VariableReference Phyllochron: VariableName=[Structure].Phyllochron.Value()
                  HoldFunction FinalLeafNumber: WhenToHold=TerminalSpikelet
                    AddFunction FinalNodeNumber
                      VariableReference MinLeafNumber: VariableName=[Phenology].MinimumLeafNumber.Value()
                      MultiplyFunction VernalLeaves
                        VariableReference UnVernalisedLeaves: VariableName=[Phenology].VrnSensitivity.Value()
                        SubtractFunction VernalisationReductionFactor
                          Constant One: FixedValue=1
                          VariableReference RelativeVrn1Expression: VariableName=[Phenology].Vrn1.Value()
                      MultiplyFunction PhotoPLeaves
                        VariableReference ShortPpLeaves: VariableName=[Phenology].PpSensitivity.Value()
                        LinearInterpolationFunction PhotoPeriodReductionFactor: XProperty=[Phenology].Photoperiod.Value()
                          XYPairs: X=[10, 16]; Y=[1, 0]
                  ExpressionFunction HaunStageTerminalSpikelet: Expression=([Structure].FinalLeafNumber.Value() - 2.85)/1.1
                    Memo
                      The Haun stage at which Terminal Spikelet occurs is determined from final leaf number using the approach described in [Brown_Anthesis_2013].
                  AddFunction HaunStage
                    VariableReference AppearedLeaves: VariableName=[Leaf].ExpandedCohortNo
                    VariableReference ProportionOfExpandingLeaf: VariableName=[Leaf].NextExpandingLeafProportion
                  Constant StemSenescenceAge: FixedValue=0
                ReproductiveOrgan Grain: GrowthRespiration=0; MaintenanceRespiration=0; RipeStage=Ripe
                  Biomass Live: DMDOfStructural=0.6
                  Biomass Dead: DMDOfStructural=0.6
                  HoldFunction NumberFunction: WhenToHold=Flowering
                    MultiplyFunction GrainNumber
                      Constant GrainsPerGramOfStem: FixedValue=26; Units=grains
                      VariableReference StemMass: VariableName=[StemPlusSpike].Wt
                  Constant DMConversionEfficiency: FixedValue=1
                  Constant RemobilisationCost: FixedValue=0
                  Constant InitialGrainProportion: FixedValue=0.05
                  Constant MaximumPotentialGrainSize: FixedValue=0.05; Units=g
                  PhaseLookup DMDemandFunction
                    PhaseLookupValue InitialPhase: Start=Flowering; End=StartGrainFill
                      FillingRateFunction
                        VariableReference NumberFunction: VariableName=[Grain].NumberFunction.Value()
                        VariableReference FillingDuration: VariableName=[Phenology].GrainDevelopment.Target.Value()
                        VariableReference ThermalTime: VariableName=[Phenology].ThermalTime.Value()
                        MultiplyFunction PotentialSizeIncrement
                          VariableReference InitialProportion: VariableName=[Grain].InitialGrainProportion.Value()
                          VariableReference MaximumSize: VariableName=[Grain].MaximumPotentialGrainSize.Value()
                    PhaseLookupValue LinearPhase: Start=StartGrainFill; End=EndGrainFill
                      FillingRateFunction
                        VariableReference NumberFunction: VariableName=[Grain].NumberFunction.Value()
                        VariableReference FillingDuration: VariableName=[Phenology].GrainFilling.Target.Value()
                        VariableReference ThermalTime: VariableName=[Phenology].ThermalTime.Value()
                        MultiplyFunction PotentialSizeIncrement
                          SubtractFunction ProportionLinearPhase
                            Constant One: FixedValue=1
                            VariableReference InitialProportion: VariableName=[Grain].InitialGrainProportion.Value()
                          VariableReference MaximumSize: VariableName=[Grain].MaximumPotentialGrainSize.Value()
                  Constant MinimumNConc: FixedValue=0.0123
                  Constant MaxNConcDailyGrowth: FixedValue=0.03
                  Constant MaximumNConc: FixedValue=0.03
                  PhaseLookup NFillingRate
                    PhaseLookupValue GrainFilling: Start=Flowering; End=EndGrainFill
                      FillingRateFunction
                        VariableReference NumberFunction: VariableName=[Grain].NumberFunction.Value()
                        AddFunction FillingDuration
                          VariableReference FloweringToGrainFilling: VariableName=[Phenology].GrainDevelopment.Target.Value()
                          VariableReference GrainFilling: VariableName=[Phenology].GrainFilling.Target.Value()
                        VariableReference ThermalTime: VariableName=[Phenology].ThermalTime.Value()
                        MultiplyFunction PotentialSizeIncrement
                          VariableReference MaximumSize: VariableName=[Grain].MaximumPotentialGrainSize.Value()
                          VariableReference MaximumNConc: VariableName=[Grain].MaximumNConc.Value()
                  Constant WaterContent: FixedValue=0.12
                  AccumulateFunction AccumThermalTime: StartStageName=Flowering; EndStageName=Maturity; FractionRemovedOnCut=0; FractionRemovedOnHarvest=0; FractionRemovedOnGraze=0; FractionRemovedOnPrune=0
                    VariableReference DailyThermalTimeValue: VariableName=[Phenology].ThermalTime.Value()
                  ExpressionFunction Protein
                    Expression=([Grain].Live.N + [Grain].Dead.N)/([Grain].Live.Wt + [Grain].Dead.Wt) * 100 * 5.71
                  BiomassRemoval BiomassRemovalDefaults
                    OrganBiomassRemovalType Harvest: FractionLiveToRemove=1; FractionDeadToRemove=0; FractionLiveToResidue=0; FractionDeadToResidue=0
                    OrganBiomassRemovalType Cut: FractionLiveToRemove=1; FractionDeadToRemove=0; FractionLiveToResidue=0; FractionDeadToResidue=0
                    OrganBiomassRemovalType Prune: FractionLiveToRemove=0; FractionDeadToRemove=0; FractionLiveToResidue=0.8; FractionDeadToResidue=0
                    OrganBiomassRemovalType Graze: FractionLiveToRemove=0.6; FractionDeadToRemove=0; FractionLiveToResidue=0.2; FractionDeadToResidue=0
                    OrganBiomassRemovalType Thin: FractionLiveToRemove=0; FractionDeadToRemove=0; FractionLiveToResidue=0.05; FractionDeadToResidue=0
                  Constant CarbonConcentration: FixedValue=0.4
                Root: GrowthRespiration=0; MaintenanceRespiration=0; RootAngle=45; SWAvailabilityRatio=0
                  Constant DMConversionEfficiency: FixedValue=1
                  Constant RemobilisationCost: FixedValue=0
                  Constant KLModifier: FixedValue=1
                  Constant SoilWaterEffect: FixedValue=1
                  Constant MaxDailyNUptake: FixedValue=20
                  Constant SenescenceRate: FixedValue=0.005
                  Constant MaximumRootDepth: FixedValue=1000000
                  Constant MaximumNConc: FixedValue=0.01
                  Constant MinimumNConc: FixedValue=0.01
                  PhaseBasedSwitch NitrogenDemandSwitch: Start=Germination; End=Maturity
                  BiomassRemoval BiomassRemovalDefaults
                    OrganBiomassRemovalType Harvest: FractionLiveToRemove=0; FractionDeadToRemove=0; FractionLiveToResidue=0.2; FractionDeadToResidue=0
                    OrganBiomassRemovalType Cut: FractionLiveToRemove=0; FractionDeadToRemove=0; FractionLiveToResidue=0.3; FractionDeadToResidue=0
                    OrganBiomassRemovalType Prune: FractionLiveToRemove=0; FractionDeadToRemove=0; FractionLiveToResidue=0.1; FractionDeadToResidue=0
                    OrganBiomassRemovalType Graze: FractionLiveToRemove=0; FractionDeadToRemove=0; FractionLiveToResidue=0.15; FractionDeadToResidue=0
                    OrganBiomassRemovalType Thin: FractionLiveToRemove=0; FractionDeadToRemove=0; FractionLiveToResidue=0.05; FractionDeadToResidue=0
                  Constant KNO3: FixedValue=0.02
                  Constant KNH4: FixedValue=0.01
                  Constant InitialDM: FixedValue=0.005; Units=g/plant
                  Constant SpecificRootLength: FixedValue=105; Units=m/g
                  MultiplyFunction RootFrontVelocity
                    PhaseLookup PotentialRootFrontVelocity
                      PhaseLookupValue PreEmergence: Start=Germination; End=Emergence
                        Constant Value: FixedValue=5; Units=mm/d
                      PhaseLookupValue PostEmergence: Start=Emergence; End=Maturity
                        Constant Value: FixedValue=20; Units=mm/d
                    WeightedTemperatureFunction TemperatureFactor: MaximumTemperatureWeighting=0.5
                      XYPairs: X=[0, 15, 25, 35]; Y=[0, 1, 1, 0]
                    LinearInterpolationFunction WaterFactor: XProperty=[SoilWaterScale]
                      SoilWaterScale
                      XYPairs: X=[0, 0.25, 1]; Y=[0, 1, 1]
                  LinearInterpolationFunction NUptakeSWFactor: XProperty=[SoilWaterScale]
                    SoilWaterScale
                    XYPairs: X=[0, 1]; Y=[0, 1]
                    Memo
                      This is modelled in the same way as the old wheat model where potential N uptake is decreased as the soil dries as described by NUptakeSWFactor
                  Constant CarbonConcentration: FixedValue=0.4
                  Constant MaintenanceRespirationFunction: FixedValue=0
                  BiomassDemand DMDemands
                    MultiplyFunction Structural
                      PartitionFractionDemandFunction DMDemandFunction
                        PhaseLookup PartitionFraction
                          PhaseLookupValue PreEmergence: Start=Germination; End=Emergence
                            Constant Value: FixedValue=0
                          PhaseLookupValue PreFlowering: Start=Emergence; End=Flowering
                            LinearInterpolationFunction AgeFactor: XProperty=[Phenology].Stage
                              XYPairs: X=[3, 4]; Y=[0.5, 0.2]
                          PhaseLookupValue PostFlowering: Start=Flowering; End=EndGrainFill
                            Constant Value: FixedValue=0.2
                      Constant StructuralFraction: FixedValue=1
                    Constant Metabolic: FixedValue=0
                    StorageDMDemandFunction Storage: same as Replacements.Bambatsi.Root.DMDemands.Storage
                  BiomassDemand NDemands: same as Replacements.Bambatsi.Root.NDemands
                Leaf: MaxCover=1; Albedo=0.25; Gsmax350=0.011; R50=150; MicroClimatePresent=true; KDead=0.3; MaximumMainStemLeafNumber=30
                  zero: CurrentExpandingLeaf, StartFractionExpanded, FractionNextleafExpanded, DeadNodesYesterday, GrowthRespiration, FRGR, PotentialEP, WaterDemand, TipsAtEmergence, CohortsAtInitialisation, FractionDied
                  LeafCohort InitialLeaves[1]: Rank=1; Area=200
                    zero: NReallocationFactor, DMReallocationFactor, NRetranslocationFactor, DMRetranslocationFactor, ShadeInducedSenRate, SenescedFrac, DeltaPotentialArea, DeltaStressConstrainedArea, DeltaCarbonConstrainedArea, PotentialStructuralDMAllocation, PotentialMetabolicDMAllocation, MetabolicNReallocated, MetabolicWtReallocated, StorageNReallocated, StorageWtReallocated, MetabolicNRetranslocated, StorageNRetrasnlocated, DMRetranslocated, MetabolicNAllocation, StructuralDMAllocation, MetabolicDMAllocation, MaintenanceRespiration
                  LeafCohort InitialLeaves[2]: Rank=2
                    zero: NReallocationFactor, DMReallocationFactor, NRetranslocationFactor, DMRetranslocationFactor, ShadeInducedSenRate, SenescedFrac, DeltaPotentialArea, DeltaStressConstrainedArea, DeltaCarbonConstrainedArea, PotentialStructuralDMAllocation, PotentialMetabolicDMAllocation, MetabolicNReallocated, MetabolicWtReallocated, StorageNReallocated, StorageWtReallocated, MetabolicNRetranslocated, StorageNRetrasnlocated, DMRetranslocated, MetabolicNAllocation, StructuralDMAllocation, MetabolicDMAllocation, Area, MaintenanceRespiration
                  LeafCohortParameters CohortParameters: ExpansionStressValue=0
                    Constant NReallocationFactor: FixedValue=1
                    Constant RemobilisationCost: FixedValue=0
                    Constant MaintenanceRespirationFunction: FixedValue=0
                    Constant NRetranslocationFactor: FixedValue=0.03
                    Constant DMReallocationFactor: FixedValue=1
                    Constant DMRetranslocationFactor: FixedValue=1
                    MinimumFunction CellDivisionStress
                      LinearInterpolationFunction WaterStressEffect: XProperty=[Leaf].Fw
                        XYPairs: X=[0.5, 1]; Y=[0.1, 1]
                      LinearInterpolationFunction NitrogenStressEffect: XProperty=[Wheat].Leaf.Fn
                        XYPairs: X=[0, 0.5, 1]; Y=[0.1, 0.1, 1]
                    MinimumFunction ExpansionStress
                      LinearInterpolationFunction WaterStressEffect: XProperty=[Root].WaterTensionFactor
                        XYPairs: X=[0.1, 1.1, 1.3]; Y=[0, 1, 1]
                      LinearInterpolationFunction TemperatureEffect: XProperty=[Phenology].MeanTemp.Value()
                        XYPairs: X=[0, 12, 14]; Y=[0, 1, 1]
                      LinearInterpolationFunction NitrogenStressEffect: XProperty=[Wheat].Leaf.Fn
                        XYPairs: X=[0, 0.5, 1]; Y=[0.1, 0.1, 1]
                    MultiplyFunction MaxArea
                      Constant AreaLargestLeaves: FixedValue=2600; Units=mm^2
                      LinearInterpolationFunction AgeFactor: XProperty=[Phenology].Stage
                        XYPairs: X=[3, 3.45, 4]; Y=[0.1, 0.5, 1]
                    MultiplyFunction GrowthDuration
                      Constant Multiplier: FixedValue=1.3
                      VariableReference Phyllochron: VariableName=[Structure].Phyllochron.Value()
                    MultiplyFunction LagDuration
                      LinearInterpolationFunction AgeFactor: XProperty=[Phenology].Stage
                        XYPairs: X=[3, 4]; Y=[0.4, 1]
                      SubtractFunction LastLeafDuration
                        AddFunction ThermalTimeToRipe
                          VariableReference EarlyReproductive: VariableName=[Phenology].EarlyReproductive.Target.Value()
                          VariableReference GrainDevelopment: VariableName=[Phenology].GrainDevelopment.Target.Value()
                          VariableReference GrainFilling: VariableName=[Phenology].GrainFilling.Target.Value()
                          VariableReference Maturing: VariableName=[Phenology].Maturing.Target.Value()
                          VariableReference Ripening: VariableName=[Phenology].Ripening.Target.Value()
                        VariableReference SenescenceDuration: VariableName=[Leaf].CohortParameters.SenescenceDuration.Value()
                    MultiplyFunction SenescenceDuration
                      Constant Multiplier: FixedValue=3
                      VariableReference Phyllochron: VariableName=[Structure].Phyllochron.Value()
                    Constant DetachmentLagDuration: FixedValue=1000000
                    Constant DetachmentDuration: FixedValue=1000000
                    Constant RelativeBranchLeafSize: FixedValue=1
                    LinearInterpolationFunction MaximumNConc: XProperty=[Phenology].Stage
                      XYPairs: X=[3, 4, 6]; Y=[0.05, 0.05, 0.02]
                    MultiplyFunction CriticalNConc
                      LinearInterpolationFunction CriticalNConcAt350ppm: XProperty=[Phenology].Stage
                        XYPairs: X=[3, 4, 6]; Y=[0.04, 0.04, 0.015]
                      LinearInterpolationFunction CO2Factor: XProperty=[IWeather].CO2
                        XYPairs: X=[350, 700]; Y=[1, 0.93]
                    LinearInterpolationFunction MinimumNConc: XProperty=[Phenology].Stage
                      XYPairs: X=[3, 4, 6]; Y=[0.01, 0.01, 0.01]
                    AddFunction DroughtInducedLagAcceleration
                      Constant One: FixedValue=1
                      MultiplyFunction Stress
                        Constant StressResponseCoefficient: FixedValue=1
                        LinearInterpolationFunction StressFactor: XProperty=[Leaf].Fw
                          XYPairs: X=[0, 1]; Y=[2, 0]
                    AddFunction DroughtInducedSenAcceleration: same as Validation.Australia.Tarlee.Tarlee.TarleeBaseSimulation.Field.wheat.Leaf.CohortParameters.DroughtInducedLagAcceleration
                    LinearInterpolationFunction SpecificLeafAreaMax: XProperty=[Phenology].Stage
                      XYPairs: X=[3, 4, 6]; Y=[17000, 20000, 17000]
                    LinearInterpolationFunction SpecificLeafAreaMin: XProperty=[Leaf].Fn
                      XYPairs: X=[0.4, 1]; Y=[14000, 14000]
                    Constant InitialNConc: FixedValue=0
                    Constant StructuralFraction: FixedValue=0.5
                    Constant StorageFraction: FixedValue=0.3
                    Constant LeafSizeShapeParameter: FixedValue=0.3
                    Constant SenessingLeafRelativeSize: FixedValue=1; Units=0-1
                    MultiplyFunction ShadeInducedSenescenceRate
                      Constant RatePerDegDay: FixedValue=0
                        Memo
                          1% per degree day means it takes one phyllochron for a shaded leaf to fully sceness
                      VariableReference ThermalTime: VariableName=[Phenology].ThermalTime.Value()
                    ArrayFunction LagDurationAgeMultiplier: Values=1 1 1
                    ArrayFunction SenescenceDurationAgeMultiplier: Values=1 1 1
                    ArrayFunction LeafSizeAgeMultiplier: Values=1 1 1 1 1 1 1 1 1 1 1 1
                  RUEModel Photosynthesis
                    Constant RUE: FixedValue=1.5
                    WeightedTemperatureFunction FT: MaximumTemperatureWeighting=0.75
                      XYPairs: X=[0, 15, 25, 35]; Y=[0, 1, 1, 0]
                    LinearInterpolationFunction FN: XProperty=[Leaf].Fn
                      XYPairs: X=[0, 1, 1.5]; Y=[0, 1, 1]
                    LinearInterpolationFunction FW: XProperty=[Leaf].Fw
                      XYPairs: X=[0, 1, 1]; Y=[0, 1, 1]
                    LinearInterpolationFunction FVPD: XProperty=[Photosynthesis].VPD
                      XYPairs: X=[0, 10, 40]; Y=[1, 1, 0]
                    RUECO2Function FCO2: PhotosyntheticPathway=C3
                    VariableReference RadnInt: VariableName=[Leaf].RadIntTot
                  Constant FrostFraction: FixedValue=0
                  Constant RemobilisationCost: FixedValue=0
                  VariableReference ThermalTime: VariableName=[Phenology].ThermalTime.Value()
                  MinimumFunction FRGRFunction
                    VariableReference RUE_FT: VariableName=[Leaf].Photosynthesis.FT.Value()
                    MinimumFunction Others
                      VariableReference RUE_FN: VariableName=[Leaf].Photosynthesis.FN.Value()
                      VariableReference RUE_FVPD: VariableName=[Leaf].Photosynthesis.FVPD.Value()
                  BiomassRemoval BiomassRemovalDefaults
                    OrganBiomassRemovalType Harvest: FractionLiveToRemove=0; FractionDeadToRemove=0; FractionLiveToResidue=0.3; FractionDeadToResidue=0.3
                    OrganBiomassRemovalType Cut: FractionLiveToRemove=0.8; FractionDeadToRemove=0.8; FractionLiveToResidue=0; FractionDeadToResidue=0
                    OrganBiomassRemovalType Prune: FractionLiveToRemove=0; FractionDeadToRemove=0; FractionLiveToResidue=0.6; FractionDeadToResidue=0.6
                    OrganBiomassRemovalType Graze: FractionLiveToRemove=0.6; FractionDeadToRemove=0.6; FractionLiveToResidue=0.1; FractionDeadToResidue=0.1
                    OrganBiomassRemovalType Thin: FractionLiveToRemove=0; FractionDeadToRemove=0; FractionLiveToResidue=0.05; FractionDeadToResidue=0.05
                  MultiplyFunction ExtinctionCoeff
                    Constant VegetativePhase: FixedValue=0.5
                    LinearInterpolationFunction DevelopmentFactor: XProperty=[Phenology].Stage
                      XYPairs: X=[3, 4.7, 5]; Y=[1, 1, 1.2]
                      Memo
                        Exntiction coefficient increases at stem extension as leaves become more prostrate
                  Constant StructuralFraction: FixedValue=0.5
                  Constant DMConversionEfficiency: FixedValue=1
                  Constant CarbonConcentration: FixedValue=0.4
                  Constant StomatalConductanceCO2Modifier: FixedValue=1
                GenericOrgan Spike
                  Constant NReallocationFactor: FixedValue=0
                  Constant RemobilisationCost: FixedValue=0
                  PhaseLookup NRetranslocationFactor
                    PhaseLookupValue EarlyGrowth: Start=Emergence; End=StartGrainFill
                      Constant ValueDuringEarlyGrowth: FixedValue=0
                    PhaseLookupValue ReproductiveGrowth: Start=StartGrainFill; End=EndGrainFill
                      Constant ValueDuringGrainFill: FixedValue=0.5
                  LinearInterpolationFunction MaximumNConc: XProperty=[Phenology].Stage
                    XYPairs: X=[4, 4.5, 5.5, 6]; Y=[0.01, 0.01, 0.025, 0.025]
                  Constant MinimumNConc: FixedValue=0.004
                  BiomassRemoval BiomassRemovalDefaults
                    OrganBiomassRemovalType Harvest: FractionLiveToRemove=0.5; FractionDeadToRemove=0; FractionLiveToResidue=0.1; FractionDeadToResidue=0
                    OrganBiomassRemovalType Cut: FractionLiveToRemove=0.8; FractionDeadToRemove=0; FractionLiveToResidue=0; FractionDeadToResidue=0
                    OrganBiomassRemovalType Prune: FractionLiveToRemove=0; FractionDeadToRemove=0; FractionLiveToResidue=0.6; FractionDeadToResidue=0
                    OrganBiomassRemovalType Graze: FractionLiveToRemove=0.6; FractionDeadToRemove=0; FractionLiveToResidue=0.2; FractionDeadToResidue=0
                    OrganBiomassRemovalType Thin: FractionLiveToRemove=0; FractionDeadToRemove=0; FractionLiveToResidue=0.05; FractionDeadToResidue=0
                  PhaseBasedSwitch NitrogenDemandSwitch: Start=Emergence; End=StartGrainFill
                  PhaseLookup DMRetranslocationFactor
                    PhaseLookupValue VegetativeGrowth: Start=Emergence; End=StartGrainFill
                      Constant DMRetranslocationFactor: FixedValue=0
                    PhaseLookupValue ReproductiveGrowth: Start=StartGrainFill; End=EndGrainFill
                      Constant DMRetranslocationFactor: FixedValue=0.5
                  Constant InitialWtFunction: FixedValue=0; Units=g/m^2
                  Constant DetachmentRateFunction: FixedValue=0; Units=/d
                  Constant MaintenanceRespirationFunction: FixedValue=0; Units=0-1
                  Constant DMConversionEfficiency: FixedValue=1; Units=0-1
                  VariableReference HeadNumber: VariableName=[Structure].TotalStemPopn
                  Constant DMReallocationFactor: FixedValue=0
                  AddFunction CriticalNConc
                    VariableReference MinimumNConc: VariableName=[Spike].MinimumNConc.Value()
                    MultiplyFunction MetabolicNconc
                      SubtractFunction NonStructuralN
                        VariableReference MaximumNConc: VariableName=[Spike].MaximumNConc.Value()
                        VariableReference MinimumNConc: VariableName=[Spike].MinimumNConc.Value()
                      Constant Proportion: FixedValue=0.8
                  LinearInterpolationFunction SenescenceRate: XProperty=[Phenology].Stage
                    XYPairs: X=[3, 4, 5, 6]; Y=[0.07, 0.04, 0.015, 0.012]
                  Constant CarbonConcentration: FixedValue=0.4
                  BiomassDemand DMDemands
                    MultiplyFunction Structural
                      PartitionFractionDemandFunction DMDemandFunction
                        LinearInterpolationFunction PartitionFraction: XProperty=[Phenology].Stage
                          XYPairs: X=[3, 4, 4.7, 5, 7, 7.000001]; Y=[0, 0, 0.01, 0.7, 0.7, 0]
                      PhaseLookup StructuralFraction
                        PhaseLookupValue VegetativeGrowth: Start=Emergence; End=StartGrainFill
                          Constant StructuralFractionEG: FixedValue=0.3
                        PhaseLookupValue ReproductiveGrowth: Start=StartGrainFill; End=EndGrainFill
                          Constant StructuralFractionGF: FixedValue=0
                    Constant Metabolic: FixedValue=0
                    StorageDMDemandFunction Storage
                      SubtractFunction StorageFraction
                        Constant One: FixedValue=1
                        VariableReference StructuralFraction: VariableName=[Spike].DMDemands.Structural.StructuralFraction.Value()
                  BiomassDemand NDemands
                    MultiplyFunction Structural
                      VariableReference MinNconc: VariableName=[Spike].minimumNconc.Value()
                      VariableReference PotentialDMAllocation: VariableName=[Spike].potentialDMAllocation.Structural
                    MultiplyFunction Metabolic
                      SubtractFunction MetabolicNconc
                        VariableReference CritNconc: VariableName=[Spike].criticalNConc.Value()
                        VariableReference MinNconc: VariableName=[Spike].minimumNconc.Value()
                      VariableReference PotentialDMAllocation: VariableName=[Spike].potentialDMAllocation.Structural
                    StorageNDemandFunction Storage
                      VariableReference NitrogenDemandSwitch: VariableName=[Spike].nitrogenDemandSwitch.Value()
                      VariableReference MaxNconc: VariableName=[Spike].maximumNconc.Value()
                GenericOrgan Stem
                  LinearInterpolationFunction SenescenceRate: XProperty=[Phenology].Stage
                    XYPairs: X=[3, 7, 8, 9]; Y=[0, 0, 0.2, 0.5]
                  Constant RemobilisationCost: FixedValue=0
                  LinearInterpolationFunction MaximumNConc: XProperty=[Phenology].Stage
                    XYPairs: X=[3, 4, 5, 6]; Y=[0.07, 0.04, 0.015, 0.012]
                  Constant MinimumNConc: FixedValue=0.0025
                  PhaseBasedSwitch NitrogenDemandSwitch: Start=Emergence; End=StartGrainFill
                  Constant NReallocationFactor: FixedValue=0
                  PhaseLookup NRetranslocationFactor
                    PhaseLookupValue VegetativeGrowth: Start=Sowing; End=Flowering
                      Constant Fraction: FixedValue=0
                    PhaseLookupValue ReproductiveGrowth: Start=Flowering; End=HarvestRipe
                      Constant Fraction: FixedValue=0.5
                  PhaseLookup DMRetranslocationFactor: same as Validation.Australia.Tarlee.Tarlee.TarleeBaseSimulation.Field.wheat.Spike.DMRetranslocationFactor
                  BiomassRemoval BiomassRemovalDefaults: same as Validation.Australia.Tarlee.Tarlee.TarleeBaseSimulation.Field.wheat.Spike.BiomassRemovalDefaults
                  DivideFunction PercentWSC
                    VariableReference WSC: VariableName=[Stem].Live.StorageWt
                    VariableReference StemWt: VariableName=[Stem].Live.Wt
                  Constant InitialWtFunction: FixedValue=0; Units=g/m^2
                  Constant DetachmentRateFunction: FixedValue=0; Units=/d
                  Constant MaintenanceRespirationFunction: FixedValue=0; Units=0-1
                  Constant DMConversionEfficiency: FixedValue=1; Units=0-1
                  Constant DMReallocationFactor: FixedValue=0
                  AddFunction CriticalNConc
                    VariableReference MinimumNConc: VariableName=[Stem].MinimumNConc.Value()
                    MultiplyFunction MetabolicNconc
                      SubtractFunction NonStructuralN
                        VariableReference MaximumNConc: VariableName=[Stem].MaximumNConc.Value()
                        VariableReference MinimumNConc: VariableName=[Stem].MinimumNConc.Value()
                      Constant Proportion: FixedValue=0.5
                  Constant CarbonConcentration: FixedValue=0.4
                  BiomassDemand DMDemands
                    MultiplyFunction Structural
                      PartitionFractionDemandFunction DMDemandFunction
                        PhaseLookup PartitionFraction
                          PhaseLookupValue PreStemElongation: Start=Emergence; End=TerminalSpikelet
                            Constant StemFraction: FixedValue=0.2
                          PhaseLookupValue StemElongation: Start=TerminalSpikelet; End=StartGrainFill
                            Constant StemFraction: FixedValue=0.7; Units=0
                          PhaseLookupValue EarEmergence: Start=StartGrainFill; End=HarvestRipe
                            Constant StemFraction: FixedValue=0
                      PhaseLookup StructuralFraction
                        PhaseLookupValue VegetativeGrowth: Start=Sowing; End=StartGrainFill
                          Constant Fraction: FixedValue=0.3
                        PhaseLookupValue ReproductiveGrowth: Start=StartGrainFill; End=HarvestRipe
                          Constant Fraction: FixedValue=0.01
                    Constant Metabolic: FixedValue=0
                    StorageDMDemandFunction Storage: same as Replacements.Bambatsi.Stem.DMDemands.Storage
                  BiomassDemand NDemands: same as Replacements.Bambatsi.Stem.NDemands
                CompositeBiomass AboveGround: DMDOfStructural=0.6
                  Propertys=[[Leaf].Live, [Leaf].Dead, [Stem].Live, [Stem].Dead, [Spike].Live, [Spike].Dead, [Grain].Live, [Grain].Dead]
                CompositeBiomass AboveGroundLive: Propertys=[[Leaf].Live, [Stem].Live, [Spike].Live, [Grain].Live]; DMDOfStructural=0.6
                CompositeBiomass AboveGroundDead: Propertys=[[Leaf].Dead, [Stem].Dead, [Spike].Dead, [Grain].Dead]; DMDOfStructural=0.6
                CompositeBiomass BelowGround: Propertys=[[Root].Live, [Root].Dead]; DMDOfStructural=0.6
                CompositeBiomass Total: DMDOfStructural=0.6
                  Propertys=[[Leaf].Live, [Leaf].Dead, [Stem].Live, [Stem].Dead, [Root].Live, [Root].Dead, [Spike].Live, [Spike].Dead, [Grain].Live, [Grain].Dead]
                CompositeBiomass TotalLive: DMDOfStructural=0.6
                  Propertys=[[Leaf].Live, [Stem].Live, [Root].Live, [Spike].Live, [Grain].Live]
                CompositeBiomass TotalDead: DMDOfStructural=0.6
                  Propertys=[[Leaf].Dead, [Stem].Dead, [Root].Dead, [Spike].Dead, [Grain].Dead]
                CompositeBiomass Ear: Propertys=[[Spike].Live, [Grain].Live, [Spike].Dead, [Grain].Dead]; DMDOfStructural=0.6
                  Memo
                    The Ear composite biomass object includes the Live and dead pools of all organs within the Ear to allow output for total dry matter and Nutrient contents, including total structural, non-structural and metabolic pools.
                CompositeBiomass StemPlusSpike: Propertys=[[Stem].Live, [Spike].Live, [Stem].Dead, [Spike].Dead]; DMDOfStructural=0.6
                CultivarFolder Cultivars
                  CultivarFolder New Zealand
                    Cultivar Alberic
                      Command:
                        [Phenology].MinimumLeafNumber.FixedValue = 9
                        [Phenology].VrnSensitivity.FixedValue = 7
                        [Phenology].PpSensitivity.FixedValue = 3
                    Cultivar Amarok
                      Command:
                        [Phenology].MinimumLeafNumber.FixedValue = 9
                        [Phenology].VrnSensitivity.FixedValue = 10
                        [Phenology].PpSensitivity.FixedValue = 6
                        [Phenology].EarlyReproductivePpSensitivity.FixedValue = 5
                        [Structure].Phyllochron.BasePhyllochron.FixedValue = 80
                    Cultivar Aspiring
                      Command:
                        [Phenology].MinimumLeafNumber.FixedValue = 9
                        [Phenology].VrnSensitivity.FixedValue = 7
                        [Phenology].PpSensitivity.FixedValue = 3
                    Cultivar BattenWinter
                      Command:
                        [Phenology].MinimumLeafNumber.FixedValue = 8
                        [Phenology].VrnSensitivity.FixedValue = 8
                        [Phenology].PpSensitivity.FixedValue = 5
                        [Phenology].EarlyReproductivePpSensitivity.FixedValue = 3
                        [Structure].Phyllochron.BasePhyllochron.FixedValue = 100
                        [Leaf].ExtinctionCoeff.VegetativePhase.FixedValue = 0.7
                        [Grain].NumberFunction.GrainNumber.GrainsPerGramOfStem.FixedValue = 22
                    Cultivar BattenSpring
                      Command:
                        [Phenology].MinimumLeafNumber.FixedValue = 7
                        [Phenology].VrnSensitivity.FixedValue = 0
                        [Phenology].PpSensitivity.FixedValue = 5
                        [Phenology].EarlyReproductivePpSensitivity.FixedValue = 3
                        [Structure].Phyllochron.BasePhyllochron.FixedValue = 100
                        [Leaf].ExtinctionCoeff.VegetativePhase.FixedValue = 0.7
                        [Grain].NumberFunction.GrainNumber.GrainsPerGramOfStem.FixedValue = 22
                    Cultivar Centaur
                      Command:
                        [Phenology].MinimumLeafNumber.FixedValue = 9
                        [Phenology].VrnSensitivity.FixedValue = 7
                        [Phenology].PpSensitivity.FixedValue = 3
                    Cultivar Claire
                      Command:
                        [Phenology].MinimumLeafNumber.FixedValue = 8
                        [Phenology].VrnSensitivity.FixedValue = 8
                        [Phenology].PpSensitivity.FixedValue = 8
                        [Phenology].EarlyReproductivePpSensitivity.FixedValue = 3
                        [Structure].Phyllochron.BasePhyllochron.FixedValue = 100
                    Cultivar Conquest
                      Command:
                        [Phenology].MinimumLeafNumber.FixedValue = 7
                        [Phenology].VrnSensitivity.FixedValue = 0
                        [Phenology].PpSensitivity.FixedValue = 3
                        [Structure].Phyllochron.BasePhyllochron.FixedValue = 100
                    Cultivar Discovery
                      Command:
                        [Phenology].MinimumLeafNumber.FixedValue = 8.5
                        [Phenology].VrnSensitivity.FixedValue = 0
                        [Phenology].PpSensitivity.FixedValue = 0
                        [Structure].Phyllochron.BasePhyllochron.FixedValue = 80
                        [Leaf].CohortParameters.MaxArea.AreaLargestLeaves.FixedValue = 1600
                        [Grain].MaximumPotentialGrainSize.FixedValue = 0.051
                        [Grain].NumberFunction.GrainNumber.GrainsPerGramOfStem.FixedValue = 35
                        [Leaf].ExtinctionCoeff.VegetativePhase.FixedValue = 0.5
                        [Structure].BranchingRate.PotentialBranchingRate.Vegetative.PotentialBranchingRate.XYPairs.Y = 0,0,0,0,4,7,12,20
                        [Grain].MaximumNConc.FixedValue = 0.025
                        [Grain].MaxNConcDailyGrowth.FixedValue = 0.025
                        [Leaf].ExtinctionCoeff.DevelopmentFactor.XYPairs.Y = 1,1,1.4
                        [Leaf].CohortParameters.MinimumNConc.XYPairs.Y = 0.01,0.008,0.008
                        [Stem].MinimumNConc.FixedValue = 0.006
                        [Spike].DMRetranslocationFactor.ReproductiveGrowth.DMRetranslocationFactor.FixedValue = 0.05
                      Memo
                        This is a spring wheat with a high grain number and later tillering
                    Cultivar Einstein
                      Command:
                        [Phenology].MinimumLeafNumber.FixedValue = 9
                        [Phenology].VrnSensitivity.FixedValue = 7
                        [Phenology].PpSensitivity.FixedValue = 3
                    Cultivar Exceed
                      Command:
                        [Phenology].MinimumLeafNumber.FixedValue = 9
                        [Phenology].VrnSensitivity.FixedValue = 7
                        [Phenology].PpSensitivity.FixedValue = 3
                    Cultivar Majestic
                      Command:
                        [Phenology].MinimumLeafNumber.FixedValue = 9
                        [Phenology].VrnSensitivity.FixedValue = 7
                        [Phenology].PpSensitivity.FixedValue = 3
                    Cultivar Option
                      Command:
                        [Phenology].MinimumLeafNumber.FixedValue = 9
                        [Phenology].VrnSensitivity.FixedValue = 7
                        [Phenology].PpSensitivity.FixedValue = 3
                    Cultivar Otane
                      Command:
                        [Phenology].MinimumLeafNumber.FixedValue = 6
                        [Phenology].VrnSensitivity.FixedValue = 0
                        [Phenology].PpSensitivity.FixedValue = 4
                        [Phenology].EarlyReproductivePpSensitivity.FixedValue = 2
                        [Structure].Phyllochron.BasePhyllochron.FixedValue = 100
                    Cultivar Pennant
                      Command:
                        [Phenology].MinimumLeafNumber.FixedValue = 9
                        [Phenology].VrnSensitivity.FixedValue = 7
                        [Phenology].PpSensitivity.FixedValue = 3
                    Cultivar Regency
                      Command:
                        [Phenology].MinimumLeafNumber.FixedValue = 9
                        [Phenology].VrnSensitivity.FixedValue = 7
                        [Phenology].PpSensitivity.FixedValue = 3
                    Cultivar Richmond
                      Command:
                        [Phenology].MinimumLeafNumber.FixedValue = 9
                        [Phenology].VrnSensitivity.FixedValue = 7
                        [Phenology].PpSensitivity.FixedValue = 3
                    Cultivar Robigus
                      Command:
                        [Phenology].MinimumLeafNumber.FixedValue = 9
                        [Phenology].VrnSensitivity.FixedValue = 7
                        [Phenology].PpSensitivity.FixedValue = 3
                    Cultivar Rongotea
                      Command:
                        [Phenology].MinimumLeafNumber.FixedValue = 7
                        [Phenology].VrnSensitivity.FixedValue = 0
                        [Phenology].PpSensitivity.FixedValue = 2
                        [Phenology].EarlyReproductivePpSensitivity.FixedValue = 3
                        [Structure].Phyllochron.BasePhyllochron.FixedValue = 100
                    Cultivar Rubric
                      Command:
                        [Phenology].MinimumLeafNumber.FixedValue = 9
                        [Phenology].VrnSensitivity.FixedValue = 7
                        [Phenology].PpSensitivity.FixedValue = 3
                    Cultivar Sage
                      Command:
                        [Phenology].MinimumLeafNumber.FixedValue = 9
                        [Phenology].VrnSensitivity.FixedValue = 7
                        [Phenology].PpSensitivity.FixedValue = 3
                    Cultivar Saracen
                      Command:
                        [Phenology].MinimumLeafNumber.FixedValue = 9
                        [Phenology].VrnSensitivity.FixedValue = 7
                        [Phenology].PpSensitivity.FixedValue = 3
                    Cultivar Savannah
                      Command:
                        [Phenology].MinimumLeafNumber.FixedValue = 9
                        [Phenology].VrnSensitivity.FixedValue = 7
                        [Phenology].PpSensitivity.FixedValue = 3
                    Cultivar Solstice
                      Command:
                        [Phenology].MinimumLeafNumber.FixedValue = 9
                        [Phenology].VrnSensitivity.FixedValue = 7
                        [Phenology].PpSensitivity.FixedValue = 3
                    Cultivar Tanker
                      Command:
                        [Phenology].MinimumLeafNumber.FixedValue = 9
                        [Phenology].VrnSensitivity.FixedValue = 7
                        [Phenology].PpSensitivity.FixedValue = 3
                    Cultivar Tribute
                      Command:
                        [Phenology].MinimumLeafNumber.FixedValue = 9
                        [Phenology].VrnSensitivity.FixedValue = 7
                        [Phenology].PpSensitivity.FixedValue = 3
                    Cultivar Wakanui
                      Command:
                        [Phenology].MinimumLeafNumber.FixedValue = 8
                        [Phenology].VrnSensitivity.FixedValue = 10
                        [Phenology].PpSensitivity.FixedValue = 0
                        [Phenology].EarlyReproductiveLongDayBase.FixedValue = 4
                        [Structure].Phyllochron.BasePhyllochron.FixedValue = 100
                        [Phenology].DailyVernalisation.TempResponseProfile.XYPairs.X = 0,1,8
                        [Phenology].DailyVernalisation.TempResponseProfile.XYPairs.Y = 0,1.204,0
                        [Leaf].ExtinctionCoeff.VegetativePhase.FixedValue = 0.7
                        [Grain].NumberFunction.GrainNumber.GrainsPerGramOfStem.FixedValue = 22
                        [Grain].MaximumPotentialGrainSize.FixedValue = 0.035
                        [Leaf].CohortParameters.MaxArea.AreaLargestLeaves.FixedValue = 3000
                    Cultivar Weston
                      Command:
                        [Phenology].MinimumLeafNumber.FixedValue = 9
                        [Phenology].VrnSensitivity.FixedValue = 7
                        [Phenology].PpSensitivity.FixedValue = 3
                  CultivarFolder Australia
                    Cultivar Axe
                      Command:
                        [Phenology].MinimumLeafNumber.FixedValue = 5
                        [Phenology].VrnSensitivity.FixedValue = 0
                        [Phenology].PpSensitivity.FixedValue = 4
                        [Phenology].EarlyReproductivePpSensitivity.FixedValue = 0
                        [Structure].Phyllochron.BasePhyllochron.FixedValue = 100
                    Cultivar Bolac
                      Command:
                        [Phenology].MinimumLeafNumber.FixedValue = 6
                        [Phenology].VrnSensitivity.FixedValue = 0
                        [Phenology].PpSensitivity.FixedValue = 4
                        [Structure].Phyllochron.BasePhyllochron.FixedValue = 100
                    Cultivar Cunningham
                      Command:
                        [Phenology].MinimumLeafNumber.FixedValue = 6
                        [Phenology].VrnSensitivity.FixedValue = 0
                        [Phenology].PpSensitivity.FixedValue = 4
                        [Structure].Phyllochron.BasePhyllochron.FixedValue = 100
                      Alias Anlace
                      Alias Arrivato
                      Alias Babbler
                      Alias Barham
                      Alias Baxter
                      Alias Bowie
                      Alias Buckley
                      Alias Buckly
                      Alias Burunga
                      Alias Camm
                      Alias Carinya
                      Alias ChiefCLPlus
                      Alias CLF_Janz
                      Alias Dagger
                      Alias DBAAurora
                      Alias ElmoreCLPlus
                      Alias Espada
                      Alias Frame
                      Alias Gazelle
                      Alias Halberd
                      Alias Hybrid_Meteor
                      Alias JusticaCLPlus
                      Alias Preston
                      Alias Saphire
                      Alias Scout
                      Alias Stiletto
                      Alias Ventura
                      Alias Wallup
                    Cultivar Derrimut
                      Command:
                        [Phenology].MinimumLeafNumber.FixedValue = 6
                        [Phenology].VrnSensitivity.FixedValue = 0
                        [Phenology].PpSensitivity.FixedValue = 4
                        [Structure].Phyllochron.BasePhyllochron.FixedValue = 100
                    Cultivar EGAGregory
                      Command:
                        [Phenology].MinimumLeafNumber.FixedValue = 6
                        [Phenology].VrnSensitivity.FixedValue = 1
                        [Phenology].PpSensitivity.FixedValue = 4
                        [Structure].Phyllochron.BasePhyllochron.FixedValue = 100
                      Alias Gregory
                      Alias Lancer
                    Cultivar GattonHartog
                      Command:
                        [Phenology].MinimumLeafNumber.FixedValue = 8
                        [Phenology].VrnSensitivity.FixedValue = 0
                        [Phenology].PpSensitivity.FixedValue = 4
                    Cultivar Gamenya
                      Command:
                        [Phenology].MinimumLeafNumber.FixedValue = 5
                        [Phenology].VrnSensitivity.FixedValue = 0
                        [Phenology].PpSensitivity.FixedValue = 3.5
                        [Structure].Phyllochron.BasePhyllochron.FixedValue = 100
                        [Phenology].EarlyReproductivePpSensitivity.FixedValue = 0
                        [Phenology].EarlyReproductiveLongDayBase.FixedValue
                    Cultivar Gauntlet
                      Command:
                        [Phenology].MinimumLeafNumber.FixedValue = 5
                        [Phenology].VrnSensitivity.FixedValue = 0
                        [Phenology].PpSensitivity.FixedValue = 4
                        [Structure].Phyllochron.BasePhyllochron.FixedValue = 100
                      Alias Braewood
                      Alias Chara
                      Alias Clearfield_stl
                      Alias Drysdale
                      Alias Envoy
                      Alias Estoc
                      Alias Giles
                      Alias Harper
                      Alias Krichauff
                      Alias Magenta
                      Alias Mitch
                      Alias Phantom
                      Alias Pugsley
                      Alias Sentinel
                      Alias Silverstar
                      Alias Suneca
                      Alias Sunlin
                      Alias Sunvale
                      Alias Trojan
                      Alias Strzelecki
                    Cultivar Gladius
                      Command:
                        [Phenology].MinimumLeafNumber.FixedValue = 6
                        [Phenology].VrnSensitivity.FixedValue = 0
                        [Phenology].PpSensitivity.FixedValue = 5
                        [Structure].Phyllochron.BasePhyllochron.FixedValue = 100
                    Cultivar Gutha
                      Command:
                        [Phenology].MinimumLeafNumber.FixedValue = 6
                        [Phenology].VrnSensitivity.FixedValue = 0
                        [Phenology].PpSensitivity.FixedValue = 5
                        [Structure].Phyllochron.BasePhyllochron.FixedValue = 100
                        [Grain].MaximumPotentialGrainSize.FixedValue = 0.041
                        [Grain].NumberFunction.GrainNumber.GrainsPerGramOfStem.FixedValue = 17
                    Cultivar H45
                      Command:
                        [Phenology].MinimumLeafNumber.FixedValue = 6
                        [Phenology].VrnSensitivity.FixedValue = 0
                        [Phenology].PpSensitivity.FixedValue = 4
                        [Structure].Phyllochron.BasePhyllochron.FixedValue = 100
                        [Grain].NumberFunction.GrainNumber.GrainsPerGramOfStem.FixedValue = 20
                      Alias Saintly
                      Alias Tamarinrock
                      Alias Waagin
                      Alias Wollaroi
                      Alias Zippy
                    Cultivar H46
                      Command:
                        [Phenology].MinimumLeafNumber.FixedValue = 8
                        [Phenology].VrnSensitivity.FixedValue = 0
                        [Phenology].PpSensitivity.FixedValue = 4
                        [Structure].Phyllochron.BasePhyllochron.FixedValue = 100
                    Cultivar Hartog
                      Command:
                        [Phenology].MinimumLeafNumber.FixedValue = 6
                        [Phenology].VrnSensitivity.FixedValue = 0
                        [Phenology].PpSensitivity.FixedValue = 5
                        [Structure].Phyllochron.BasePhyllochron.FixedValue = 100
                        [Grain].MaximumPotentialGrainSize.FixedValue = 0.041
                      Alias Annuello
                      Alias Carnamah
                      Alias Catalina
                      Alias CLF_Stiletto
                      Alias Cobra
                      Alias Corack
                      Alias Correll
                      Alias Diamondbird
                      Alias Gladius
                      Alias Goroke
                      Alias GrenadeCLPlus
                      Alias Guardian
                      Alias Halbred
                      Alias Impala
                      Alias Justica
                      Alias Kord
                      Alias Merlin
                      Alias Mitre
                      Alias Peake
                      Alias Shield
                      Alias Spitfire
                      Alias Sunguard
                      Alias Sunstate
                      Alias Yallaroi
                      Alias Yawa
                      Alias Yitpi
                    Cultivar Hibred_Mercury
                      Command:
                        [Phenology].MinimumLeafNumber.FixedValue = 6
                        [Phenology].VrnSensitivity.FixedValue = 0
                        [Phenology].PpSensitivity.FixedValue = 4
                        [Structure].Phyllochron.BasePhyllochron.FixedValue = 100
                      Alias Agtscythe
                      Alias Arrino
                      Alias Bonnie_rock
                      Alias Bowerbird
                      Alias Condo
                      Alias Dart
                      Alias Dollarbird
                      Alias Emurock
                      Alias Hyperno
                      Alias ImposeCLPlus
                      Alias Kalka
                      Alias Kirchauff
                      Alias Kukri
                      Alias Hunter
                      Alias LRPBArrow
                      Alias Mace
                      Alias Ouyen
                      Alias Ruby
                      Alias Tamaroi
                      Alias Young
                      Alias Katana
                    Cultivar Janz
                      Command:
                        [Phenology].MinimumLeafNumber.FixedValue = 6
                        [Phenology].VrnSensitivity.FixedValue = 1
                        [Phenology].PpSensitivity.FixedValue = 4
                        [Structure].Phyllochron.BasePhyllochron.FixedValue = 100
                    Cultivar Kelallac
                      Command:
                        [Phenology].MinimumLeafNumber.FixedValue = 8
                        [Phenology].VrnSensitivity.FixedValue = 0
                        [Phenology].PpSensitivity.FixedValue = 4
                        [Structure].Phyllochron.BasePhyllochron.FixedValue = 100
                      Alias Beaufort
                      Alias Calingiri
                      Alias Endure
                      Alias Forrest
                      Alias Scenario
                      Alias Zen
                    Cultivar Kennedy
                      Command:
                        [Phenology].MinimumLeafNumber.FixedValue = 8
                        [Phenology].VrnSensitivity.FixedValue = 0
                        [Phenology].PpSensitivity.FixedValue = 4
                        [Structure].Phyllochron.BasePhyllochron.FixedValue = 100
                    Cultivar Lang
                      Command:
                        [Phenology].MinimumLeafNumber.FixedValue = 6
                        [Phenology].VrnSensitivity.FixedValue = 0
                        [Phenology].PpSensitivity.FixedValue = 5
                        [Structure].Phyllochron.BasePhyllochron.FixedValue = 100
                    Cultivar Livingston
                      Command:
                        [Phenology].MinimumLeafNumber.FixedValue = 5
                        [Phenology].VrnSensitivity.FixedValue = 0
                        [Phenology].PpSensitivity.FixedValue = 4
                        [Structure].Phyllochron.BasePhyllochron.FixedValue = 100
                    Cultivar Lincoln
                      Command:
                        [Phenology].MinimumLeafNumber.FixedValue = 6
                        [Phenology].VrnSensitivity.FixedValue = 0
                        [Phenology].PpSensitivity.FixedValue = 4
                        [Structure].Phyllochron.BasePhyllochron.FixedValue = 100
                      Alias Crusader
                    Cultivar Mace
                      Command:
                        [Phenology].MinimumLeafNumber.FixedValue = 6
                        [Phenology].VrnSensitivity.FixedValue = 0
                        [Phenology].PpSensitivity.FixedValue = 4
                        [Structure].Phyllochron.BasePhyllochron.FixedValue = 100
                    Cultivar MacKellar
                      Command:
                        [Phenology].MinimumLeafNumber.FixedValue = 7
                        [Phenology].VrnSensitivity.FixedValue = 5
                        [Phenology].PpSensitivity.FixedValue = 5
                        [Phenology].EarlyReproductiveLongDayBase.FixedValue = 3.5
                        [Structure].Phyllochron.BasePhyllochron.FixedValue = 100
                      Alias Adagio
                      Alias Brennan
                      Alias Declic
                      Alias Revenue
                    Cultivar Matong
                      Command:
                        [Phenology].MinimumLeafNumber.FixedValue = 7
                        [Phenology].VrnSensitivity.FixedValue = 1
                        [Phenology].PpSensitivity.FixedValue = 4
                        [Structure].Phyllochron.BasePhyllochron.FixedValue = 100
                        [Grain].NumberFunction.GrainNumber.GrainsPerGramOfStem.FixedValue = 22
                    Cultivar McCubbin
                      Command:
                        [Phenology].MinimumLeafNumber.FixedValue = 8
                        [Phenology].VrnSensitivity.FixedValue = 0
                        [Phenology].PpSensitivity.FixedValue = 5
                        [Structure].Phyllochron.BasePhyllochron.FixedValue = 90
                    Cultivar Mercury
                      Command:
                        [Phenology].MinimumLeafNumber.FixedValue = 7
                        [Phenology].VrnSensitivity.FixedValue = 0
                        [Phenology].PpSensitivity.FixedValue = 4
                        [Phenology].EarlyReproductiveLongDayBase.FixedValue = 3.5
                        [Structure].Phyllochron.BasePhyllochron.FixedValue = 80
                    Cultivar Ruby
                      Command:
                        [Phenology].MinimumLeafNumber.FixedValue = 8
                        [Phenology].VrnSensitivity.FixedValue = 0
                        [Phenology].PpSensitivity.FixedValue = 4
                        [Structure].Phyllochron.BasePhyllochron.FixedValue = 100
                    Cultivar Spear
                      Command:
                        [Phenology].MinimumLeafNumber.FixedValue = 7
                        [Phenology].VrnSensitivity.FixedValue = 0
                        [Phenology].PpSensitivity.FixedValue = 4
                        [Structure].Phyllochron.BasePhyllochron.FixedValue = 100
                        [Grain].MaximumPotentialGrainSize.FixedValue = 0.045
                    Cultivar Sunbri
                      Command:
                        [Phenology].MinimumLeafNumber.FixedValue = 7
                        [Phenology].VrnSensitivity.FixedValue = 0
                        [Phenology].PpSensitivity.FixedValue = 5
                        [Structure].Phyllochron.BasePhyllochron.FixedValue = 100
                    Cultivar Sunco
                      Command:
                        [Phenology].MinimumLeafNumber.FixedValue = 6.5
                        [Phenology].VrnSensitivity.FixedValue = 0
                        [Phenology].PpSensitivity.FixedValue = 3.5
                        [Phenology].EarlyReproductivePpSensitivity.FixedValue = 4
                        [Structure].Phyllochron.BasePhyllochron.FixedValue = 100
                      Alias Advantage
                      Alias Bellaroi
                      Alias Caparoi
                      Alias Ellison
                      Alias Suntop
                    Cultivar Ventura
                      Command:
                        [Phenology].MinimumLeafNumber.FixedValue = 8
                        [Phenology].VrnSensitivity.FixedValue = 0
                        [Phenology].PpSensitivity.FixedValue = 4
                        [Structure].Phyllochron.BasePhyllochron.FixedValue = 100
                    Cultivar Wedgetail
                      Command:
                        [Phenology].MinimumLeafNumber.FixedValue = 8
                        [Phenology].VrnSensitivity.FixedValue = 0
                        [Phenology].PpSensitivity.FixedValue = 4
                        [Structure].Phyllochron.BasePhyllochron.FixedValue = 100
                      Alias Lorikeet
                      Alias Rosella
                      Alias Whistler
                      Alias Wylah
                      Alias Eaglehawk
                    Cultivar Westonia
                      Command:
                        [Phenology].MinimumLeafNumber.FixedValue = 5
                        [Phenology].VrnSensitivity.FixedValue = 0
                        [Phenology].PpSensitivity.FixedValue = 4
                        [Structure].Phyllochron.BasePhyllochron.FixedValue = 100
                    Cultivar Wilgoyne
                      Command:
                        [Phenology].MinimumLeafNumber.FixedValue = 6
                        [Phenology].VrnSensitivity.FixedValue = 0
                        [Phenology].PpSensitivity.FixedValue = 4
                        [Structure].Phyllochron.BasePhyllochron.FixedValue = 100
                        [Grain].NumberFunction.GrainNumber.GrainsPerGramOfStem.FixedValue = 20
                        [Grain].MaximumPotentialGrainSize.FixedValue = 0.045
                    Cultivar Wyalkatchem
                      Command:
                        [Phenology].MinimumLeafNumber.FixedValue = 8
                        [Phenology].VrnSensitivity.FixedValue = 0
                        [Phenology].PpSensitivity.FixedValue = 4
                        [Structure].Phyllochron.BasePhyllochron.FixedValue = 100
                    Cultivar Yitpi
                      Command:
                        [Phenology].MinimumLeafNumber.FixedValue = 8
                        [Phenology].VrnSensitivity.FixedValue = 0
                        [Phenology].PpSensitivity.FixedValue = 5
                        [Phenology].EarlyReproductiveLongDayBase.FixedValue = 2.5
                        [Phenology].EarlyReproductivePpSensitivity.FixedValue = 5
                        [Structure].Phyllochron.BasePhyllochron.FixedValue = 80
                    Cultivar Young
                      Command:
                        [Phenology].MinimumLeafNumber.FixedValue = 8
                        [Phenology].VrnSensitivity.FixedValue = 0
                        [Phenology].PpSensitivity.FixedValue = 4
                        [Structure].Phyllochron.BasePhyllochron.FixedValue = 100
                  CultivarFolder Turkey
                    Cultivar Konya
                      Command:
                        [Phenology].MinimumLeafNumber.FixedValue = 7
                        [Phenology].VrnSensitivity.FixedValue = 4
                        [Phenology].PpSensitivity.FixedValue = 4
                        [Structure].Phyllochron.BasePhyllochron.FixedValue = 100
                        [Grain].NumberFunction.GrainNumber.GrainsPerGramOfStem.FixedValue = 16
                        [Grain].MaximumPotentialGrainSize.FixedValue = 0.050
                        [Grain].MaximumNConc.FixedValue = 0.026
                        [Phenology].GrainFilling.Target.FixedValue = 450
                        [Stem].DMRetranslocationFactor.ReproductiveGrowth.DMRetranslocationFactor.FixedValue = 0.2
                        [Stem].StructuralFraction.VegetativeGrowth.Fraction.FixedValue = 0.6
                        [Leaf].ExtinctionCoeff.VegetativePhase.FixedValue = 0.8
                  CultivarFolder China
                    Cultivar Keyu13
                      Command:
                        [Phenology].MinimumLeafNumber.FixedValue = 7
                        [Phenology].VrnSensitivity.FixedValue = 5
                        [Phenology].PpSensitivity.FixedValue = 3
                        [Structure].Phyllochron.BasePhyllochron.FixedValue = 100
                  CultivarFolder USA
                    Cultivar Yecora
                      Command:
                        [Phenology].MinimumLeafNumber.FixedValue = 6
                        [Phenology].VrnSensitivity.FixedValue = 0
                        [Phenology].PpSensitivity.FixedValue = 4
                        [Structure].Phyllochron.BasePhyllochron.FixedValue = 90
                        [Leaf].CohortParameters.MaxArea.AreaLargestLeaves.FixedValue = 4000
                    Cultivar Rex
                      Command:
                        [Phenology].MinimumLeafNumber.FixedValue = 7
                        [Phenology].VrnSensitivity.FixedValue = 6
                        [Phenology].PpSensitivity.FixedValue = 4
                        [Grain].NumberFunction.GrainNumber.GrainsPerGramOfStem.FixedValue = 18
                        [Grain].MaximumNConc.FixedValue = 0.02
                    Cultivar Nugaines
                      Command:
                        [Phenology].MinimumLeafNumber.FixedValue = 7
                        [Phenology].VrnSensitivity.FixedValue = 6
                        [Phenology].PpSensitivity.FixedValue = 4
                        [Grain].NumberFunction.GrainNumber.GrainsPerGramOfStem.FixedValue = 20
                        [Grain].MaximumNConc.FixedValue = 0.02
                    Cultivar Hyslop
                      Command:
                        [Phenology].MinimumLeafNumber.FixedValue = 7
                        [Phenology].VrnSensitivity.FixedValue = 6
                        [Phenology].PpSensitivity.FixedValue = 4
                        [Grain].NumberFunction.GrainNumber.GrainsPerGramOfStem.FixedValue = 22
                        [Grain].MaximumNConc.FixedValue = 0.02
                    Cultivar Stephens
                      Command:
                        [Phenology].MinimumLeafNumber.FixedValue = 7
                        [Phenology].VrnSensitivity.FixedValue = 6
                        [Phenology].PpSensitivity.FixedValue = 4
                        [Grain].NumberFunction.GrainNumber.GrainsPerGramOfStem.FixedValue = 25
                        [Grain].MaximumNConc.FixedValue = 0.02
                  CultivarFolder Europe
                    Cultivar Dekan
                      Command:
                        [Phenology].MinimumLeafNumber.FixedValue = 9
                        [Phenology].VrnSensitivity.FixedValue = 7
                        [Phenology].PpSensitivity.FixedValue = 3
                        [Phenology].EarlyReproductivePpSensitivity.FixedValue = 3
                        [Structure].Phyllochron.BasePhyllochron.FixedValue = 100
                        [Leaf].ExtinctionCoeff.VegetativePhase.FixedValue = 0.8
                    Cultivar Rosario
                      Command:
                        [Phenology].MinimumLeafNumber.FixedValue = 9
                        [Phenology].VrnSensitivity.FixedValue = 7
                        [Phenology].PpSensitivity.FixedValue = 3
                        [Phenology].EarlyReproductivePpSensitivity.FixedValue = 3
                        [Structure].Phyllochron.BasePhyllochron.FixedValue = 100
                        [Leaf].ExtinctionCoeff.VegetativePhase.FixedValue = 0.8
                    Cultivar Ararat
                      Command:
                        [Phenology].MinimumLeafNumber.FixedValue = 9
                        [Phenology].VrnSensitivity.FixedValue = 7
                        [Phenology].PpSensitivity.FixedValue = 3
                        [Phenology].EarlyReproductivePpSensitivity.FixedValue = 3
                        [Structure].Phyllochron.BasePhyllochron.FixedValue = 100
                        [Leaf].ExtinctionCoeff.VegetativePhase.FixedValue = 0.8
                  CultivarFolder Africa
                    Cultivar HAR1685
                      Command:
                        [Phenology].MinimumLeafNumber.FixedValue = 7
                        [Phenology].VrnSensitivity.FixedValue = 0
                        [Phenology].PpSensitivity.FixedValue = 3
                        [Structure].Phyllochron.BasePhyllochron.FixedValue = 100
                        [Grain].NumberFunction.GrainNumber.GrainsPerGramOfStem.FixedValue = 17
                        [Phenology].GrainFilling.Target.FixedValue = 350
                  CultivarFolder Iran
                    Cultivar Gorgan
                      Command:
                        [Phenology].MinimumLeafNumber.FixedValue = 7
                        [Phenology].VrnSensitivity.FixedValue = 0
                        [Phenology].PpSensitivity.FixedValue = 4
                        [Structure].Phyllochron.BasePhyllochron.FixedValue = 100
              MicroClimate: a_interception=0; b_interception=1; c_interception=0; d_interception=0; soil_albedo=0.23; SoilHeatFluxFraction=0.4; NightInterceptionFraction=0.5; ReferenceHeight=2
              Manager Harvesting
```csharp
using System;
using Models.Core;
using Models.PMF;
using Models.Soils;
using Models.Soils.Nutrients;
using Models.Soils.Nutrients;
using Models.Utilities;
using APSIM.Shared.Utilities;

namespace Models
{
    [Serializable] 
    public class Script : Model
    {
        [Link] Plant Wheat;
        
        [EventSubscribe("DoManagement")]
        private void OnDoManagement(object sender, EventArgs e)
        {
            if (Wheat.IsReadyForHarvesting)
            {
                Wheat.Harvest();
                Wheat.EndCrop();
            }
        }
    }
}
```
              Soil: ASCOrder=Sodosol; ASCSubOrder=Red; SoilType=Sand; Site=Tarlee; NearestTown=Tarlee; Region=Mid North; State=South Australia; Country=Australia; ApsoilNumber=610; Latitude=-34.276; Longitude=138.759; LocationAccuracy=+/- 20m
                DataSource=Characterisation 2008 by University of Adelaide, CSIRO Sustainable Ecosystems and Allan Mayfield Consulting, Clare, SA
                Comments=Roots: Wheat 90cm; barley and oats estimated; OC WB as measured; Strongly duplex low-moderate clay soil. Surface CEC low, moderate below. Texture change at about 7cm. Little chemical impediment to root growth, but high ESP below about 60cm may result in slaking or dispersion and high bulk density.
                Water
                  Thickness  BD    AirDry  LL15   DUL    SAT
                  100        1.54  0.055   0.11   0.223  0.389
                  200        1.41  0.167   0.209  0.388  0.438
                  300        1.53  0.22    0.22   0.342  0.393
                  300        1.57  0.22    0.22   0.293  0.378
                  350        1.6   0.22    0.22   0.264  0.366
                  SoilCrop WheatSoil: LL=[0.11, 0.209, 0.24, 0.225, 0.222]; KL=[0.06, 0.06, 0.06, 0.04, 0.04]; XF=[1, 1, 1, 1, 1]
                SoilWater: SummerDate=1-Nov; SummerU=6; SummerCona=3.5; WinterDate=1-Apr; WinterU=2; WinterCona=2; DiffusConst=88; DiffusSlope=35; Salb=0.13; CN2Bare=73; CNRed=20; CNCov=0.8; max_pond=0; Thickness=[100, 200, 300, 300, 350]; SWCON=[0.5, 0.5, 0.5, 0.5, 0.5]; ResidueInterception=0
                Nutrient
                  DirectedGraphInfo={Nodes=[{Name=Inert, OutlineColour=Black}, {Name=SurfaceResidue, OutlineColour=Black}, {Name=FOMLignin, OutlineColour=Black}, {Name=FOMCellulose, OutlineColour=Black}, {Name=FOMCarbohydrate, OutlineColour=Black}, {Name=Microbial, OutlineColour=Black}, {Name=Humic, OutlineColour=Black}, {Name=Urea, OutlineColour=Black}, {Name=NO3, OutlineColour=Black}, {Name=NH4, OutlineColour=Black}, {Name=Atmosphere, OutlineColour=White}, {Name=PlantAvailableNO3, OutlineColour=Black}, {Name=PlantAvailableNH4, OutlineColour=Black}], Arcs=[{SourceName=SurfaceResidue, DestinationName=Microbial}, {SourceName=SurfaceResidue, DestinationName=Humic}, {SourceName=FOMLignin, DestinationName=Microbial}, {SourceName=FOMLignin, DestinationName=Humic}, {SourceName=FOMCellulose, DestinationName=Microbial}, {SourceName=FOMCellulose, DestinationName=Humic}, {SourceName=FOMCarbohydrate, DestinationName=Microbial}, {SourceName=FOMCarbohydrate, DestinationName=Humic}, {SourceName=Microbial, DestinationName=Microbial}, {SourceName=Microbial, DestinationName=Humic}, {SourceName=Humic, DestinationName=Microbial}, {SourceName=Urea, DestinationName=NH4}, {SourceName=NO3, DestinationName=Atmosphere}, {SourceName=NH4, DestinationName=NO3}]}
                SoilOrganicMatter: RootCN=40; SoilCN=12; EnrACoeff=7.4; EnrBCoeff=0.2; OCUnits=Total
                  Thickness  OC    FBiom  FInert  RootWt
                  100        0.96  0.04   0.1     300
                  200        0.72  0.02   0.15    200
                  300        0.38  0.02   0.5     200
                  300        0.12  0.02   0.99    200
                  350        0.12  0.01   0.99    100
                Analysis: Thickness=[100, 200, 300, 300, 350]; PH=[7, 7.9, 8.9, 9.2, 9.2]; PHUnits=Water; BoronUnits=0
                InitialWater Initial water: PercentMethod=0; FractionFull=1
                Sample Initial conditions: Thickness=[1800]; NO3=[10]; NH4=[1]; NO3Units=kg/ha; NH4Units=kg/ha; SWUnits=Volumetric; OCUnits=Total; PHUnits=Water
                CERESSoilTemperature
              Manager SowingFertiliser
                Amount = 160
                CropName = wheat
```csharp
using System;
using Models.Core;
using Models.PMF;
namespace Models
{
    [Serializable]
    public class Script : Model
    {
        [Link] Clock Clock;
        [Link] Fertiliser Fertiliser;
        [Link] Summary Summary;
        
        
        [Description("Amount of fertiliser to be applied (kg/ha)")]
        public double Amount { get; set; }
        
        [Description("Crop to be fertilised")]
        public string CropName { get; set; }
        
        
        

        [EventSubscribe("Sowing")]
        private void OnSowing(object sender, EventArgs e)
        {
            Model crop = sender as Model;
            if (crop.Name.ToLower() == CropName.ToLower())
                Fertiliser.Apply(Amount: Amount, Type: Fertiliser.Types.NO3N);
        }
        
    }
}
```
              Fertiliser
              SoluteManager
            SoilArbitrator
            MicroClimate: a_interception=0; b_interception=1; c_interception=0; d_interception=0; soil_albedo=0.23; SoilHeatFluxFraction=0.4; NightInterceptionFraction=0.5; ReferenceHeight=2
      Folder Hudson
        Memo
          This dataset demonstrates cropping system performance and soil carbon dynamics under continuous winter cereal versus perrenial pasture.  The cropping and pasture systems experiment was established in August 1994 on the farming property ‘Hudson’ located in the foothills of the Liverpool Ranges (31.758S, 150.458E; average annual rainfall 684mm with some summer dominance, average annual pan evaporation 1718 mm).  Further details about the experiment and the data can be found at [Young2009_HudsonCarbon] and [paydar_deep_2005].
        Simulation HudsonW1
          Clock: StartDate=1994-08-05; EndDate=2000-01-23
          Summary summaryfile
          Weather: FileName=Hudson.met
          Zone paddock: Area=1; Slope=0
            Report: EventNames=[Clock].DoReport
              VariableNames:
                [Clock].Today
                [Soil].Nutrient.TotalC[1] as TOC0_10cm
                [Soil].Nutrient.TotalC[2] as TOC10_30cm
                [Soil].Nutrient.TotalC[3] as TOC30_60cm
                ([Soil].Nutrient.TotalC[1]+[Soil].Nutrient.TotalC[2]) as TOC0_30cm
            Report Hudsonreport: EventNames=[Clock].DoReport
              VariableNames:
                [Clock].Today
                sum([Soil].SoilWater.SWmm[2:3]) as SW10_50cm
                sum([Soil].SoilWater.SWmm[4:5]) as SW50_90cm
                sum([Soil].SoilWater.SWmm[6:7]) as SW90_130cm
                sum([Soil].SoilWater.SWmm[8:9]) as SW130_170cm
                sum([Soil].SoilWater.SWmm[10:11]) as SW170_210cm
                sum([Soil].SoilWater.SWmm[12:13]) as SW210_250cm
                sum([Soil].SoilWater.SWmm[2:13]) as SW10_250cm
                [Soil].SoilWater.Runoff
                [Soil].SoilWater.Drainage
                [Soil].SoilWater.Es
                [Soil].SoilWater.Eo
                [Wheat].Leaf.LAI
                [Wheat].AboveGround.Wt
                [Wheat].Grain.Wt
                [Weather].Rain
                [Wheat].AboveGround.N
                [Wheat].BelowGround.N
            Soil: Latitude=0; Longitude=0
              Water
                Thickness  BD   AirDry  LL15  DUL   SAT
                100        1    0.1     0.24  0.47  0.53
                200        1.1  0.1     0.28  0.49  0.54
                200        1.1  0.1     0.28  0.52  0.57
                200        1.1  0.1     0.29  0.52  0.55
                200        1.1  0.1     0.29  0.51  0.54
                200        1.2  0.1     0.29  0.5   0.53
                200        1.2  0.1     0.29  0.5   0.53
                200        1.2  0.1     0.33  0.48  0.51
                200        1.2  0.1     0.33  0.48  0.51
                200        1.2  0.1     0.35  0.48  0.51
                200        1.2  0.1     0.35  0.47  0.5
                200        1.2  0.1     0.35  0.45  0.48
                200        1.3  0.1     0.35  0.45  0.48
                200        1.3  0.1     0.35  0.45  0.48
                200        1.3  0.1     0.35  0.45  0.48
                200        1.3  0.1     0.35  0.45  0.48
                SoilCrop WheatSoil
                  LL=[0.25, 0.3, 0.3, 0.33, 0.33, 0.35, 0.35, 0.4, 0.4, 0.4, 0.4, 0.4, 0.4, 0.4, 0.4, 0.4]
                  KL=[0.06, 0.06, 0.06, 0.06, 0.06, 0.06, 0.06, 0.06, 0.06, 0.06, 0, 0, 0, 0, 0, 0]
                  XF=[1, 1, 1, 1, 1, 1, 1, 1, 1, 1, 0, 0, 0, 0, 0, 0]
              SoilWater: SummerDate=1-Nov; SummerU=9; SummerCona=5; WinterDate=1-Apr; WinterU=9; WinterCona=5; DiffusConst=40; DiffusSlope=16; Salb=0.13; CN2Bare=72; CNRed=20; CNCov=0.8; max_pond=0; ResidueInterception=0
                Thickness=[100, 200, 200, 200, 200, 200, 200, 200, 200, 200, 200, 200, 200, 200, 200, 200]
                SWCON=[0.4, 0.4, 0.4, 0.4, 0.4, 0.4, 0.4, 0.4, 0.4, 0.4, 0.4, 0.4, 0.4, 0.4, 0.4, 0.4]
              Nutrient: same as Validation.Australia.Tarlee.Tarlee.TarleeBaseSimulation.Field.Soil.Nutrient
              SoilOrganicMatter: RootCN=40; SoilCN=14.5; EnrACoeff=7.4; EnrBCoeff=0.2; OCUnits=Total
                Thickness  OC      FBiom  FInert  RootWt
                100        1.4395  0.2    0.32    1.75
                200        1.11    0.03   0.5     1.5
                200        1.11    0.02   0.6     1.25
                200        1.11    0.015  0.7     1
                200        1.11    0.01   0.85    0.08
                200        1       0.01   0.9     0.6
                200        0.8     0.01   0.99    0.4
                200        0.45    0.01   0.99    0.2
                200        0.45    0.01   0.99    0
                200        0.45    0.01   0.99    0
                200        0.45    0.01   0.99    0
                200        0.45    0.01   0.99    0
                200        0.45    0.01   0.99    0
                200        0.45    0.01   0.99    0
                200        0.45    0.01   0.99    0
                200        0.45    0.01   0.99    0
              Analysis: PH=[6, 6.4, 6.8, 7.2, 7.6, 8, 8, 8, 8, 8, 8, 8, 8, 8, 8, 8]; PHUnits=Water; BoronUnits=0
                Thickness=[100, 200, 200, 200, 200, 200, 200, 200, 200, 200, 200, 200, 200, 200, 200, 200]
              Sample Initial nitrogen: NO3Units=ppm; NH4Units=ppm; SWUnits=Volumetric; OCUnits=Total; PHUnits=Water
                Thickness  NO3   NH4
                100        10.7  0.3
                200        9.99  0.3
                200        7.87  0.3
                200        6.2   0.3
                200        4.85  0.3
                200        3.56  0.3
                200        2.72  0.3
                200        2.34  0.3
                200        2.47  0.3
                200        3.24  0.3
                200        4.25  0.3
                200        4.94  0.3
                200        5.2   0.3
                200        4.95  0.3
                200        4.52  0.3
                200        4.24  0.3
              Sample Initial water: NO3Units=ppm; NH4Units=ppm; SWUnits=Volumetric; OCUnits=Total; PHUnits=Water
                Thickness=[100, 200, 200, 200, 200, 200, 200, 200, 200, 200, 200, 200, 200, 200, 200, 200]
                SW=[0.43, 0.43, 0.48, 0.47, 0.46, 0.46, 0.46, 0.485, 0.49, 0.474, 0.457, 0.453, 0.447, 0.465, 0.457, 0.43]
              CERESSoilTemperature
            SurfaceOrganicMatter SurfaceOM: InitialResidueName=unknown; InitialResidueType=wheat; InitialResidueMass=0; InitialStandingFraction=1; InitialCPR=0; InitialCNR=100; FractionFaecesAdded=0.5
            MicroClimate: a_interception=0; b_interception=1; c_interception=0; d_interception=0; soil_albedo=0.23; SoilHeatFluxFraction=0.4; NightInterceptionFraction=0.5; ReferenceHeight=2
            Fertiliser
            Operations
              1994-08-05  [Wheat].Sow(population:26, cultivar:Hartog, depth:40, rowSpacing:300);
              1994-08-05  [Fertiliser].Apply(70, Fertiliser.Types.NO3N, 50);
              1994-09-07  [Wheat].EndCrop();
              1994-10-27  [Wheat].Harvest();
              1995-06-01  [Wheat].Sow(cultivar:Hartog, population:126, depth:40, rowSpacing:300);
              1995-06-01  [Fertiliser].Apply(80, Fertiliser.Types.NO3N, 50);
              1995-11-28  [Wheat].Harvest();
              1995-11-28  [Wheat].EndCrop();
              1996-07-02  [Wheat].Sow(cultivar:Hartog, population:126, depth:40, rowSpacing:300);
              1996-07-02  [Fertiliser].Apply(101, Fertiliser.Types.NO3N, 50);
              1996-12-04  [Wheat].EndCrop();
              1997-06-02  [Wheat].Sow(cultivar:Hartog, population:71, depth:40, rowSpacing:300);
              1997-06-02  [Fertiliser].Apply(100, Fertiliser.Types.NO3N, 50);
              1997-11-26  [Wheat].Harvest();
              1997-11-26  [Wheat].EndCrop();
              1998-06-18  [Wheat].Sow(cultivar:Hartog, population:126, depth:40, rowSpacing:300);
              1998-06-18  [Fertiliser].Apply(102, Fertiliser.Types.NO3N, 50);
              1998-12-02  [Wheat].Harvest();
              1998-12-02  [Wheat].EndCrop();
              1999-06-23  [Wheat].Sow(cultivar:Hartog, population:50, depth:40, rowSpacing:300);
              1999-06-23  [Fertiliser].Apply(102, Fertiliser.Types.NO3N, 50);
              1999-12-16  [Wheat].Harvest();
              1999-12-16  [Wheat].EndCrop();
            Plant Wheat: CropType=Wheat; IsEnding=false; DaysAfterEnding=0
            SoluteManager
          SoilArbitrator
        Simulation HudsonP3
          Weather: FileName=Hudson.met
          Clock: StartDate=1994-08-05; EndDate=2000-01-23
          Summary
          SoilArbitrator Soil Arbitrator
          Zone Field: Area=1; Slope=0
            Soil: Latitude=0; Longitude=0
              Water
                Thickness  BD   AirDry  LL15  DUL   SAT   KS
                100        1    0.1     0.24  0.47  0.53  384
                200        1.1  0.1     0.28  0.49  0.54  384
                200        1.1  0.1     0.28  0.52  0.57  384
                200        1.1  0.1     0.29  0.52  0.55  384
                200        1.1  0.1     0.29  0.51  0.54  384
                200        1.2  0.1     0.29  0.5   0.53  384
                200        1.2  0.1     0.29  0.5   0.53  384
                200        1.2  0.1     0.33  0.48  0.51  384
                200        1.2  0.1     0.33  0.48  0.51  384
                200        1.2  0.1     0.35  0.48  0.51  384
                200        1.2  0.1     0.35  0.47  0.5   384
                200        1.2  0.1     0.35  0.47  0.5   384
                200        1.3  0.1     0.35  0.47  0.5   384
                200        1.3  0.1     0.35  0.47  0.5   384
                200        1.3  0.1     0.35  0.47  0.5   384
                200        1.3  0.1     0.35  0.47  0.5   384
                SoilCrop BambatsiSoil
                  LL=[0.25, 0.3, 0.3, 0.3, 0.3, 0.33, 0.35, 0.38, 0.38, 0.4, 0.4, 0.4, 0.4, 0.4, 0.4, 0.4]
                  KL=[0.04, 0.04, 0.04, 0.03, 0.02, 0.01, 0.01, 0.01, 0.005, 0.005, 0.005, 0.005, 0.005, 0.005, 0.005, 0.005]
                  XF=[1, 1, 1, 1, 1, 0.75, 0.75, 0.5, 0.5, 0.25, 0.25, 0, 0, 0, 0, 0]
              SoilWater: SummerDate=1-Nov; SummerU=9; SummerCona=5; WinterDate=1-Apr; WinterU=9; WinterCona=5; DiffusConst=40; DiffusSlope=16; Salb=0.13; CN2Bare=75; CNRed=20; CNCov=0.8; max_pond=0; ResidueInterception=0
                Thickness=[100, 200, 200, 200, 200, 200, 200, 200, 200, 200, 200, 200, 200, 200, 200, 200]
                SWCON=[0.4, 0.4, 0.4, 0.4, 0.4, 0.4, 0.4, 0.4, 0.4, 0.4, 0.4, 0.4, 0.4, 0.4, 0.4, 0.4]
              Nutrient: same as Validation.Australia.Tarlee.Tarlee.TarleeBaseSimulation.Field.Soil.Nutrient
              SoilOrganicMatter: RootCN=40; SoilCN=14.5; EnrACoeff=7.4; EnrBCoeff=0.2; OCUnits=Total
                Thickness  OC    FBiom  FInert  RootWt
                100        1.44  0.03   0.45    1.75
                200        1.11  0.03   0.45    1.5
                200        1.11  0.02   0.6     1.25
                200        1.11  0.015  0.7     1
                200        1.11  0.01   0.85    0.8
                200        1     0.01   0.9     0.6
                200        0.8   0.01   0.99    0.4
                200        0.45  0.01   0.99    0.2
                200        0.45  0.01   0.99    0
                200        0.45  0.01   0.99    0
                200        0.45  0.01   0.99    0
                200        0.45  0.01   0.99    0
                200        0.45  0.01   0.99    0
                200        0.45  0.01   0.99    0
                200        0.45  0.01   0.99    0
                200        0.45  0.01   0.99    0
              Analysis: same as Validation.Australia.Hudson.HudsonW1.paddock.soil.Analysis
              Sample Initial nitrogen: same as Validation.Australia.Hudson.HudsonW1.paddock.soil.Initial nitrogen
              Sample Initial water: NO3Units=ppm; NH4Units=ppm; SWUnits=Volumetric; OCUnits=Total; PHUnits=Water
                Thickness=[100, 200, 200, 200, 200, 200, 200, 200, 200, 200, 200, 200, 200, 200, 200, 200]
                SW=[0.47, 0.47, 0.53, 0.5, 0.47, 0.46, 0.45, 0.45, 0.45, 0.43, 0.42, 0.42, 0.41, 0.43, 0.42, 0.41]
              CERESSoilTemperature
            Irrigation
            Fertiliser
            SurfaceOrganicMatter: InitialResidueName=Wheat; InitialResidueType=Wheat; InitialResidueMass=2000; InitialStandingFraction=0; InitialCPR=0; InitialCNR=80; FractionFaecesAdded=0.5
            MicroClimate: a_interception=0.1; b_interception=1; c_interception=0; d_interception=0; soil_albedo=0.13; SoilHeatFluxFraction=0.4; NightInterceptionFraction=0.5; ReferenceHeight=2
            Plant Bambatsi: CropType=Bambatsi; IsEnding=false; DaysAfterEnding=0
            Operations
              1994-12-08  [Fertiliser].Apply(20.0, Fertiliser.Types.UreaN, 0);
              1995-01-01  [Bambatsi].Sow(population: 100, cultivar: Bambatsi, depth: 100, rowSpacing: 100);
              1995-10-09  [Bambatsi].Harvest();
              1995-11-21  [Fertiliser].Apply(50.0, Fertiliser.Types.UreaN, 0);
              1995-12-01  [Bambatsi].Harvest();
              1996-01-30  [Bambatsi].Harvest();
              1996-02-28  [Bambatsi].Harvest();
              1996-11-26  [Bambatsi].Harvest();
              1996-12-22  [Fertiliser].Apply(50.0, Fertiliser.Types.UreaN, 0);
              1997-01-14  [Bambatsi].Harvest();
              1997-03-04  [Bambatsi].Harvest();
              1997-06-26  [Fertiliser].Apply(22.0, Fertiliser.Types.UreaN, 0);
              1997-11-17  [Bambatsi].Harvest();
              1998-04-07  [Bambatsi].Harvest();
              1998-10-09  [Fertiliser].Apply(30.0, Fertiliser.Types.UreaN, 0);
              1998-12-17  [Bambatsi].Harvest();
              1999-02-16  [Bambatsi].Harvest();
              1999-06-02  [Bambatsi].Harvest();
              1999-11-10  [Fertiliser].Apply(50.0, Fertiliser.Types.UreaN, 0);
              1999-09-29  [Bambatsi].Harvest();
              2000-02-02  [Bambatsi].Harvest();
            SoluteManager
            Report: EventNames=[Clock].DoReport
              VariableNames:
                [Clock].Today
                [Soil].Nutrient.TotalC[1] as TOC0_10cm
                [Soil].Nutrient.TotalC[2] as TOC10_30cm
                [Soil].Nutrient.TotalC[3] as TOC30_60cm
                ([Soil].Nutrient.TotalC[1]+[Soil].Nutrient.TotalC[2]) as TOC0_30cm
            Report Hudsonreport: same as Validation.Australia.Hudson.HudsonW1.paddock.Hudsonreport
          MicroClimate: a_interception=0; b_interception=1; c_interception=0; d_interception=0; soil_albedo=0.23; SoilHeatFluxFraction=0.4; NightInterceptionFraction=0.5; ReferenceHeight=2
      Folder Brigalow Catchment Study
        Memo
          This dataset was originally simulated using APSIM by [huth_impacts_2010].  The study was conducted near Theodore, Queensland, Australia (24.81°S, 149.80°E). Several catchments were monitored under different land uses following clearing of native Brigalow Forest (Acacia Harpophylla).  Data for part of the cropping catchment are used here.
        Simulation Brigalow
          Weather: FileName=Brigalow.met
          Clock: StartDate=1982-03-01; EndDate=2005-12-31
          Summary summaryfile
          Zone Upper: Area=1; Slope=0
            Operations SowOperations
              1982-03-01  // weed sow plants =50, sowing_depth = 20, cultivar = perennial, row_spacing = 250, crop_class = perennial_grass
              1982-10-25  // weed end_crop
              1982-10-25  [SurfaceOrganicMatter].Incorporate(fraction: 0.7, depth: 0);
              1982-10-26  // weed sow plants =50, sowing_depth = 20, cultivar = perennial, row_spacing = 250, crop_class = perennial_grass
              1982-10-01  //[Soil].Nutrient.Reset();
              1984-09-01  // weed sow plants =10, sowing_depth = 20, cultivar = perennial, row_spacing = 250, crop_class = perennial_grass
              1984-09-27  //[Maize].Sow(cultivar:Dekalb_XL82, population:2, depth:30, rowSpacing:1000);
              1985-04-01  // weed NOTsow plants =50, sowing_depth = 20, cultivar = perennial, row_spacing = 250, crop_class = perennial_grass
              1985-04-04  [Wheat].Sow(cultivar:hartog, population:34, depth:30, rowSpacing:300);
              1986-05-06  [Wheat].Sow(cultivar:hartog, population:34, depth:30, rowSpacing:300);
              1987-05-11  [Wheat].Sow(cultivar:hartog, population:34, depth:30, rowSpacing:300);
              1988-04-12  [Wheat].Sow(cultivar:hartog, population:34, depth:30, rowSpacing:300);
              1989-06-14  [Wheat].Sow(cultivar:hartog, population:34, depth:30, rowSpacing:300);
              1990-05-10  [Wheat].Sow(cultivar:hartog, population:34, depth:30, rowSpacing:300);
              1991-06-13  [Wheat].Sow(cultivar:hartog, population:34, depth:30, rowSpacing:300);
              1992-05-07  [Wheat].Sow(cultivar:hartog, population:34, depth:30, rowSpacing:300);
              1994-01-01  [Soil].SoilWater.CN2Bare = 75
              1994-04-20  [Wheat].Sow(cultivar:hartog, population:77, depth:30, rowSpacing:300);
              1995-01-16  //[Maize].Sow(cultivar:Dekalb_XL82, population:13, depth:30, rowSpacing:1000);
              1995-03-31  //[Maize].OnEndCrop();
              1995-11-01  //[Maize].Sow(cultivar:Dekalb_XL82, population:3, depth:30, rowSpacing:1000);
              1996-05-23  [Wheat].Sow(cultivar:hartog, population:49, depth:30, rowSpacing:300);
              1997-02-17  //[Maize].Sow(cultivar:Dekalb_XL82, population:3, depth:30, rowSpacing:1000);
              1997-03-21  //[Maize].OnEndCrop();
              1997-06-20  [Wheat].Sow(cultivar:hartog, population:20, depth:30, rowSpacing:300);
              1997-08-11  [Wheat].EndCrop();
              1997-10-15  //[Maize].Sow(cultivar:Dekalb_XL82, population:3, depth:30, rowSpacing:1000);
              1998-02-01  // weed sow plants =50, sowing_depth = 20, cultivar = perennial, row_spacing = 250, crop_class = perennial_grass
              1998-04-01  // weed end_crop
              1998-05-30  [Wheat].Sow(cultivar:hartog, population:34, depth:30, rowSpacing:300);
              1998-11-04  //[Maize].Sow(cultivar:Dekalb_XL82, population:3, depth:30, rowSpacing:1000);
              1999-03-26  // weed sow plants =50, sowing_depth = 20, cultivar = perennial, row_spacing = 250, crop_class = perennial_grass
              2000-01-18  //[Maize].Sow(cultivar:Dekalb_XL82, population:3, depth:30, rowSpacing:1000);
              2000-03-04  //[Maize].OnEndCrop();
              2000-11-27  // weed sow plants =100, sowing_depth = 20, cultivar = perennial, row_spacing = 250, crop_class = perennial_grass
              2000-12-06  //[Maize].Sow(cultivar:Dekalb_XL82, population:7, depth:30, rowSpacing:1000);
              2001-12-04  //[Maize].Sow(cultivar:Dekalb_XL82, population:5, depth:30, rowSpacing:1000);
              2002-06-29  [Wheat].Sow(cultivar:hartog, population:78, depth:30, rowSpacing:300);
              2003-05-14  [Wheat].Sow(cultivar:hartog, population:60, depth:30, rowSpacing:300);
              2004-01-28  //[Maize].Sow(cultivar:Dekalb_XL82, population:5, depth:30, rowSpacing:1000);
              2004-11-25  //[Maize].Sow(cultivar:Dekalb_XL82, population:7, depth:30, rowSpacing:1000);
            Operations TillOperations
              1983-10-01  [SurfaceOrganicMatter].Incorporate(fraction: 0.5, depth: 100);
              1984-07-02  [SurfaceOrganicMatter].Incorporate(fraction: 0.5, depth: 100);
              1984-08-20  [SurfaceOrganicMatter].Incorporate(fraction: 0.5, depth: 100);
              1984-08-30  [SurfaceOrganicMatter].Incorporate(fraction: 0.5, depth: 100);
              1985-01-21  [SurfaceOrganicMatter].Incorporate(fraction: 0.5, depth: 100);
              1985-01-30  [SurfaceOrganicMatter].Incorporate(fraction: 0.5, depth: 100);
              1985-02-14  [SurfaceOrganicMatter].Incorporate(fraction: 0.5, depth: 100);
              1985-03-07  [SurfaceOrganicMatter].Incorporate(fraction: 0.5, depth: 100);
              1985-03-22  [SurfaceOrganicMatter].Incorporate(fraction: 0.5, depth: 100);
              1985-10-15  [SurfaceOrganicMatter].Incorporate(fraction: 0.5, depth: 100);
              1985-11-04  [SurfaceOrganicMatter].Incorporate(fraction: 0.5, depth: 100);
              1986-01-02  [SurfaceOrganicMatter].Incorporate(fraction: 0.5, depth: 100);
              1986-01-14  [SurfaceOrganicMatter].Incorporate(fraction: 0.5, depth: 100);
              1986-02-11  [SurfaceOrganicMatter].Incorporate(fraction: 0.5, depth: 100);
              1986-03-06  [SurfaceOrganicMatter].Incorporate(fraction: 0.5, depth: 100);
              1986-10-31  [SurfaceOrganicMatter].Incorporate(fraction: 0.5, depth: 100);
              1986-11-19  [SurfaceOrganicMatter].Incorporate(fraction: 0.5, depth: 100);
              1986-12-19  [SurfaceOrganicMatter].Incorporate(fraction: 0.5, depth: 100);
              1987-02-12  [SurfaceOrganicMatter].Incorporate(fraction: 0.5, depth: 100);
              1987-04-07  [SurfaceOrganicMatter].Incorporate(fraction: 0.5, depth: 100);
              1987-12-22  [SurfaceOrganicMatter].Incorporate(fraction: 0.5, depth: 100);
              1988-01-29  [SurfaceOrganicMatter].Incorporate(fraction: 0.5, depth: 100);
              1988-03-08  [SurfaceOrganicMatter].Incorporate(fraction: 0.5, depth: 100);
              1988-04-11  [SurfaceOrganicMatter].Incorporate(fraction: 0.5, depth: 100);
              1988-09-28  [SurfaceOrganicMatter].Incorporate(fraction: 0.5, depth: 100);
              1988-11-25  [SurfaceOrganicMatter].Incorporate(fraction: 0.5, depth: 100);
              1989-01-09  [SurfaceOrganicMatter].Incorporate(fraction: 0.5, depth: 100);
              1989-01-19  [SurfaceOrganicMatter].Incorporate(fraction: 0.5, depth: 100);
              1989-02-20  [SurfaceOrganicMatter].Incorporate(fraction: 0.5, depth: 100);
              1989-04-11  [SurfaceOrganicMatter].Incorporate(fraction: 0.5, depth: 100);
              1989-04-20  [SurfaceOrganicMatter].Incorporate(fraction: 0.5, depth: 100);
              1989-06-05  [SurfaceOrganicMatter].Incorporate(fraction: 0.5, depth: 100);
              1991-03-21  [SurfaceOrganicMatter].Incorporate(fraction: 0.5, depth: 100);
              1991-05-08  [SurfaceOrganicMatter].Incorporate(fraction: 0.5, depth: 100);
              1991-12-12  [SurfaceOrganicMatter].Incorporate(fraction: 0.5, depth: 100);
              1993-02-04  [SurfaceOrganicMatter].Incorporate(fraction: 0.5, depth: 100);
              1993-03-24  [SurfaceOrganicMatter].Incorporate(fraction: 0.5, depth: 100);
              1994-02-16  [SurfaceOrganicMatter].Incorporate(fraction: 0.5, depth: 100);
              1994-04-07  [SurfaceOrganicMatter].Incorporate(fraction: 0.5, depth: 100);
              1996-11-08  [SurfaceOrganicMatter].Incorporate(fraction: 0.5, depth: 100);
              1996-12-18  [SurfaceOrganicMatter].Incorporate(fraction: 0.5, depth: 100);
              1996-12-20  [SurfaceOrganicMatter].Incorporate(fraction: 0.5, depth: 100);
              1997-02-17  [SurfaceOrganicMatter].Incorporate(fraction: 0.5, depth: 100);
              1997-04-22  [SurfaceOrganicMatter].Incorporate(fraction: 0.5, depth: 100);
              1999-02-24  [SurfaceOrganicMatter].Incorporate(fraction: 0.5, depth: 100);
              1999-03-25  [SurfaceOrganicMatter].Incorporate(fraction: 0.5, depth: 100);
              1999-10-27  [SurfaceOrganicMatter].Incorporate(fraction: 0.5, depth: 100);
              1999-10-27  [SurfaceOrganicMatter].Incorporate(fraction: 0.5, depth: 100);
              1999-11-09  [SurfaceOrganicMatter].Incorporate(fraction: 0.5, depth: 100);
              2001-05-29  [SurfaceOrganicMatter].Incorporate(fraction: 0.5, depth: 100);
              2001-08-21  [SurfaceOrganicMatter].Incorporate(fraction: 0.5, depth: 100);
              2006-02-08  [SurfaceOrganicMatter].Incorporate(fraction: 0.5, depth: 100);
              2006-04-18  [SurfaceOrganicMatter].Incorporate(fraction: 0.5, depth: 100);
              2007-01-19  [SurfaceOrganicMatter].Incorporate(fraction: 0.5, depth: 100);
              2007-02-06  [SurfaceOrganicMatter].Incorporate(fraction: 0.5, depth: 100);
              2007-03-26  [SurfaceOrganicMatter].Incorporate(fraction: 0.5, depth: 100);
            Operations SprayOperations
              1987-12-09  // SprayManager spray
              1988-03-15  // SprayManager spray
              1989-06-09  // SprayManager spray
              1989-11-30  // SprayManager spray
              1990-01-12  // SprayManager spray
              1990-03-20  // SprayManager spray
              1990-04-21  // SprayManager spray
              1990-06-26  // SprayManager spray
              1990-07-21  // SprayManager spray
              1990-12-19  // SprayManager spray
              1991-01-20  // SprayManager spray
              1991-02-20  // SprayManager spray
              1991-07-29  // SprayManager spray
              1991-12-14  // SprayManager spray
              1992-01-08  // SprayManager spray
              1992-03-03  // SprayManager spray
              1992-04-28  // SprayManager spray
              1992-05-06  // SprayManager spray
              1992-06-09  // SprayManager spray
              1993-01-16  // SprayManager spray
              1993-09-25  // SprayManager spray
              1993-11-09  // SprayManager spray
              1994-01-20  // SprayManager spray
              1994-03-20  // SprayManager spray
              1994-11-25  // SprayManager spray_not_effective
              1994-12-13  // SprayManager spray
              1995-02-03  // SprayManager spray
              1995-06-11  // SprayManager spray
              1995-11-01  // SprayManager spray
              1996-02-13  // SprayManager spray
              1996-05-16  // SprayManager spray
              1996-11-08  // SprayManager spray
              1996-12-14  // SprayManager spray
              1997-03-21  // SprayManager spray_not_effective
              1997-06-06  // SprayManager spray
              1997-08-11  // SprayManager spray
              1997-11-21  // SprayManager spray
              1997-12-19  // SprayManager sprayheliothis
              1998-03-19  // SprayManager spray
              1998-05-18  // SprayManager spray
              1998-10-19  // SprayManager spray
              1998-11-27  // SprayManager spray
              1998-12-08  // SprayManager spray
              1999-08-27  // SprayManager spray
              2000-01-14  // SprayManager spray
              2000-01-19  // SprayManager spray
              2000-03-04  // SprayManager spray
              2000-05-26  // SprayManager spray
              2000-08-28  // SprayManager spray
              2000-11-27  // SprayManager spray
              2001-11-26  // SprayManager spray
              2001-12-06  // SprayManager spray
              2002-04-17  // SprayManager spray
              2002-06-10  // SprayManager spray
              2002-06-10  // SprayManager spray
              2002-06-10  // SprayManager spray
              2002-06-22  // SprayManager spray
              2002-06-22  // SprayManager spray
              2002-12-18  // SprayManager spray
              2003-01-07  // SprayManager spray
              2003-02-19  // SprayManager spray
              2003-03-27  // SprayManager spray
              2003-07-08  // SprayManager spray
              2003-10-29  // SprayManager spray
              2003-10-29  // SprayManager spray
              2003-12-16  // SprayManager spray
              2004-01-09  // SprayManager spray
              2004-02-16  // SprayManager spray
              2004-11-04  // SprayManager spray
              2004-11-20  // SprayManager spray
              2005-03-25  // SprayManager spray
              2005-04-18  // SprayManager spray
              2005-05-19  // SprayManager spray
              2005-11-18  // SprayManager spray_not_effective
              2006-05-18  // SprayManager spray
              2007-02-26  // SprayManager spray
              2007-03-22  // SprayManager spray
              2007-06-22  // SprayManager spray
              2007-08-15  // SprayManager spray
              2007-08-30  // SprayManager spray
              2007-09-04  // SprayManager spray
            Operations SoilOperations
              1982-03-08  // ClOutput do_output
              1983-09-05  // ClOutput do_output
              1987-11-19  // ClOutput do_output
              1990-11-15  // ClOutput do_output
              1997-01-15  // ClOutput do_output
              2000-05-16  // ClOutput do_output
            Folder Manager folder
              Manager SprayManager
```csharp
using System;
using Models.Core;
using Models.PMF;
using Models.PMF;
namespace Models
{
    [Serializable]
    [System.Xml.Serialization.XmlInclude(typeof(Model))]
    public class Script : Model
    {
        [Link] Clock Clock;
        [EventSubscribe("Commencing")]
        private void OnSimulationCommencing(object sender, EventArgs e)
        {
            /*
                days_since_spraying = 0
            */
        }
        [EventSubscribe("DoCalculations")]
        private void OnDoCalculations(object sender, EventArgs e)
        {
            /*
                days_since_spraying = days_since_spraying + 1
            */
        }
        //[EventSubscribe("unknown")]
        //private void OnUnknown(object sender, EventArgs e)
        //{
        /*
                // ----- spray ----- 

if weed.plant_status = 'alive' or weed.plant_status = 'dead' then
   !weed kill_crop
   !weed end_crop
   days_since_spraying = 0
endif


            */
        //}
    }
}
```
              Manager TillManager
```csharp
using System;
using Models.Core;
using Models.PMF;
using Models.PMF;
using Models.Utilities;
using APSIM.Shared.Utilities;
using Models.Soils.Nutrients;
using System.Diagnostics;

namespace Models
{
    [Serializable]
    [System.Xml.Serialization.XmlInclude(typeof(Model))]
    public class Script : Model
    {
        [Link] Clock Clock;
        [ScopedLinkByName] NutrientPool FOMLignin;
        
        [EventSubscribe("Commencing")]
        private void OnSimulationCommencing(object sender, EventArgs e)
        {
        }
        [EventSubscribe("DoManagement")]
        private void OnDoManagement(object sender, EventArgs e)
        {
            //Debugger.Break();
            
            if (Clock.Today.DayOfYear == 60 && Clock.Today.Year == 1982)
            {
                double[] CAdded = new double[] { 11600, 80, 80 };
                double[] NAdded = new double[] { 1450, 10, 10 };
                FOMLignin.Add(CAdded, NAdded);
            }
        }
    }
}
```
              Manager Calculations
                CumRunoff = 0
```csharp
using System;
using Models.Core;
using Models.PMF;
using Models.PMF;
using Models.Soils;
using Models.Soils.Nutrients;
using Models.Soils.Nutrients;
namespace Models
{
    [Serializable]
    [System.Xml.Serialization.XmlInclude(typeof(Model))]
    public class Script : Model
    {
        [Link] Clock Clock;
        [Link] Soil Soil;
        
        public double CumRunoff { get; set; }
        
        [EventSubscribe("Commencing")]
        private void OnSimulationCommencing(object sender, EventArgs e)
        {
/*
                CumRunoff = 0
POC = 0
HOC = 0
TOC = 0
sw40 = 0
sw80 = 0
sw120 = 0
sw200 = 0
Nexport = 0
c10 = 0
c20 = 0
c30 = 0
            */
        }
        [EventSubscribe("DoCalculations")]
        private void OnDoCalculations(object sender, EventArgs e)
        {
            if (Clock.Today.Year > 1983)
                CumRunoff += Soil.SoilWater.Runoff;
                
 
/*
POC = (fom_c(1) + fom_c(2) + fom_c(3) + biom_c(1) + biom_c(2) + biom_c(3))/1000.
HOC = (hum_c(1) + hum_c(2) + hum_c(3))/1000
            TOC = (carbon_tot(1) + carbon_tot(2) + carbon_tot(3)) /1000

!sw40 = sw_dep(1) + sw_dep(2) +sw_dep(3) + sw_dep(4)
!sw80 = sw40 + sw_dep(5) + sw_dep(6)
!sw120 = sw80 + sw_dep(7) + sw_dep(8)
!sw200 = sw120 + sw_dep(9) + sw_dep(10)

sw40 = sw_dep(1) + sw_dep(2) +sw_dep(3) + sw_dep(4)
sw80 = sw_dep(5) + sw_dep(6)
sw120 = sw_dep(7) + sw_dep(8)
sw200 = sw_dep(9) + sw_dep(10) + sw_dep(11) + sw_dep(12)

c10 = carbon_tot(1) + 7590
c20 = carbon_tot(2) + 2460
c30 = carbon_tot(3) + 2600

            */
        }
    }
}
```
              Manager Nrunoff
```csharp
using System;
using Models.Core;
using Models.PMF;
using Models.PMF;
namespace Models
{
    [Serializable]
    [System.Xml.Serialization.XmlInclude(typeof(Model))]
    public class Script : Model
    {
        [Link] Clock Clock;
        [EventSubscribe("Commencing")]
        private void OnSimulationCommencing(object sender, EventArgs e)
        {
            /*
                CumNRunoff = 0
NRunoff = 0
delta = 0
            */
        }
        [EventSubscribe("DoCalculations")]
        private void OnDoCalculations(object sender, EventArgs e)
        {
            /*
                
if (runoff > 0) then
NRunoff = runoff * 0.17
   if no3(1) < NRunoff then
      NRunoff = no3(1)
   endif

   CumNRunoff = CumNRunoff + NRunoff
   delta = NRunoff * -1
    'Upper Nitrogen' set dlt_no3 = delta 0 0 0 0 0 0 0 0 0 0 0

else
   NRunoff = 0
   delta = 0
endif

            */
        }
    }
}
```
            SurfaceOrganicMatter: InitialResidueName=Brigalow; InitialResidueType=all_lign; InitialResidueMass=40000; InitialStandingFraction=0; InitialCPR=0; InitialCNR=30; FractionFaecesAdded=0.5
            Report BrigalowReport: EventNames=[Clock].DoReport
              VariableNames:
                [Clock].Today
                [Wheat].AboveGround.Wt
                [Wheat].Grain.Wt
                [Wheat].Grain.Protein
                sum([Soil].SoilWater.ESW)
                sum([Soil].Nutrient.FOMC) as TotalFOMC
            Soil Upper: SoilType=clay; Site=Jimbour; NearestTown=Jimbour, Q 4352; Region=South East Queensland; NaturalVegetation=Grassland, mainly Qld bluegrass; Latitude=0; Longitude=0
              Water
                Thickness  BD    AirDry  LL15  DUL   SAT
                100        1.38  0.04    0.1   0.35  0.45
                100        1.64  0.06    0.15  0.35  0.45
                100        1.73  0.06    0.18  0.35  0.41
                100        1.74  0.06    0.18  0.35  0.41
                200        1.77  0.06    0.19  0.35  0.38
                200        1.8   0.06    0.2   0.35  0.38
                200        1.83  0.06    0.22  0.34  0.37
                200        1.84  0.06    0.23  0.33  0.37
                200        1.84  0.06    0.23  0.3   0.37
                200        1.85  0.06    0.23  0.3   0.37
                200        1.86  0.06    0.24  0.3   0.37
                200        1.86  0.06    0.24  0.3   0.37
                SoilCrop SorghumSoil
                  LL=[0.1, 0.15, 0.18, 0.18, 0.19, 0.2, 0.24, 0.27, 0.28, 0.28, 0.28, 0.28]
                  KL=[0.04, 0.04, 0.04, 0.04, 0.02, 0.02, 0.02, 0.01, 0.01, 0, 0, 0]
                  XF=[1, 1, 1, 1, 1, 1, 1, 1, 1, 0, 0, 0]
                SoilCrop WheatSoil
                  LL=[0.1, 0.15, 0.18, 0.18, 0.19, 0.2, 0.24, 0.27, 0.28, 0.28, 0.28, 0.28]
                  KL=[0.06, 0.06, 0.06, 0.06, 0.06, 0.06, 0.06, 0.06, 0.06, 0.06, 0.06, 0]
                  XF=[1, 1, 1, 1, 1, 1, 1, 1, 1, 0, 0, 0]
                SoilCrop MaizeSoil
                  LL=[0.1, 0.15, 0.18, 0.18, 0.19, 0.2, 0.24, 0.27, 0.28, 0.28, 0.28, 0.28]
                  KL=[0.04, 0.04, 0.04, 0.04, 0.02, 0.02, 0.02, 0.01, 0.01, 0, 0, 0]
                  XF=[1, 1, 1, 1, 1, 1, 1, 1, 1, 0, 0, 0]
              SoilWater: SummerDate=1-Nov; SummerU=10; SummerCona=4; WinterDate=1-Apr; WinterU=10; WinterCona=4; DiffusConst=40; DiffusSlope=16; Salb=0.13; CN2Bare=72; CNRed=20; CNCov=0.8; max_pond=0; ResidueInterception=0
                Thickness=[100, 100, 100, 100, 200, 200, 200, 200, 200, 200, 200, 200]
                SWCON=[0.3, 0.3, 0.3, 0.3, 0.3, 0.3, 0.3, 0.3, 0.3, 0.3, 0.3, 0.3]
              Nutrient: same as Validation.Australia.Tarlee.Tarlee.TarleeBaseSimulation.Field.Soil.Nutrient
              SoilOrganicMatter: RootCN=40; SoilCN=17.6; EnrACoeff=7.4; EnrBCoeff=0.2; OCUnits=Total
                Thickness  OC     FBiom  FInert  RootWt
                100        1.86   0.05   0.29    0
                100        0.848  0.05   0.175   0
                100        0.725  0.05   0.2     0
                100        0.4    0.01   0.9     0
                200        0.2    0.01   0.95    0
                200        0.2    0.01   0.95    0
                200        0.2    0.01   0.95    0
                200        0.2    0.01   0.95    0
                200        0.2    0.01   0.95    0
                200        0.2    0.01   0.95    0
                200        0.2    0.01   0.95    0
                200        0.2    0.01   0.95    0
              Analysis: PH=[6.6, 7.5, 8, 5, 5, 5, 5, 5, 5, 5, 5, 5]; PHUnits=Water; BoronUnits=0
                Thickness=[100, 100, 100, 100, 200, 200, 200, 200, 200, 200, 200, 200]
              Sample Initial nitrogen: NO3Units=ppm; NH4Units=ppm; SWUnits=Volumetric; OCUnits=Total; PHUnits=Water
                Thickness  NO3      NH4
                100        6.50303  0.599108
                100        2.10101  0.100018
                100        2.10101  0.100018
                100        1.70101  0.100018
                200        1.70101  0.100018
                200        1.70101  0.100018
                200        1.70101  0.100018
                200        1.70101  0.100018
                200        1.70101  0.100018
                200        1.70101  0.100018
                200        1.70101  0.100018
                200        0.1      0.100001
              Sample Initial water: NO3Units=ppm; NH4Units=ppm; SWUnits=Volumetric; OCUnits=Total; PHUnits=Water
                Thickness=[100, 100, 100, 100, 200, 200, 200, 200, 200, 200, 200, 200]
                SW=[0.1, 0.15, 0.18, 0.18, 0.29, 0.26, 0.24, 0.23, 0.23, 0.23, 0.24, 0.24]
              CERESSoilTemperature
            Report ClOutput: VariableNames=[Clock].Today
            MicroClimate: a_interception=0; b_interception=1; c_interception=0; d_interception=0; soil_albedo=0.23; SoilHeatFluxFraction=0.4; NightInterceptionFraction=0.5; ReferenceHeight=2
            Plant Wheat: CropType=Wheat; IsEnding=false; DaysAfterEnding=0
            SoluteManager
            Report: EventNames=[Clock].DoReport
              VariableNames:
                [Clock].Today
                [Soil].Nutrient.TotalC[1] as TOC0_10cm
                [Soil].Nutrient.TotalC[2] as TOC10_30cm
                [Soil].Nutrient.TotalC[3] as TOC30_60cm
                ([Soil].Nutrient.TotalC[1]+[Soil].Nutrient.TotalC[2]+[Soil].Nutrient.TotalC[3]) as TOC0_30cm
                ([Soil].Nutrient.TotalN[1]+[Soil].Nutrient.NO3[1]+[Soil].Nutrient.NH4[1]) as TON0_10cm
                ([Soil].Nutrient.TotalN[1]+[Soil].Nutrient.TotalN[2]+[Soil].Nutrient.TotalN[3]) as TON0_30cm
                sum([Soil].Nutrient.NO3.kgha)
            Report HarvestReport: EventNames=[Wheat].Harvesting
              VariableNames:
                [Clock].Today.Year
                [Wheat].Grain.Wt
                [Wheat].AboveGround.Wt
                [Wheat].Grain.Size
            Manager Harvest
              script: same as in Validation.Australia.Tarlee.Tarlee.TarleeBaseSimulation.Field.Harvesting
          SoilArbitrator
          MicroClimate: a_interception=0; b_interception=1; c_interception=0; d_interception=0; soil_albedo=0.23; SoilHeatFluxFraction=0.4; NightInterceptionFraction=0.5; ReferenceHeight=2
    Folder North America
      Folder Pendleton
        Experiment Pendleton
          Factors
            Factor Treatment: Specifications=[Operations]
              Operations 6_fBN0
                1931-08-15  [SurfaceOrganicMatter].Incorporate(fraction: 0.67, depth: 0)
                1931-10-15  [Wheat].Sow(cultivar:Rex, depth:30, population:100, rowSpacing:300);
                1933-08-15  [SurfaceOrganicMatter].Incorporate(fraction: 0.67, depth: 0)
                1933-10-15  [Wheat].Sow(cultivar:Rex, depth:30, population:100, rowSpacing:300);
                1935-08-15  [SurfaceOrganicMatter].Incorporate(fraction: 0.67, depth: 0)
                1935-10-15  [Wheat].Sow(cultivar:Rex, depth:30, population:100, rowSpacing:300);
                1937-08-15  [SurfaceOrganicMatter].Incorporate(fraction: 0.67, depth: 0)
                1937-10-15  [Wheat].Sow(cultivar:Rex, depth:30, population:100, rowSpacing:300);
                1939-08-15  [SurfaceOrganicMatter].Incorporate(fraction: 0.67, depth: 0)
                1939-10-15  [Wheat].Sow(cultivar:Rex, depth:30, population:100, rowSpacing:300);
                1941-08-15  [SurfaceOrganicMatter].Incorporate(fraction: 0.67, depth: 0)
                1941-10-15  [Wheat].Sow(cultivar:Rex, depth:30, population:100, rowSpacing:300);
                1943-08-15  [SurfaceOrganicMatter].Incorporate(fraction: 0.67, depth: 0)
                1943-10-15  [Wheat].Sow(cultivar:Rex, depth:30, population:100, rowSpacing:300);
                1945-08-15  [SurfaceOrganicMatter].Incorporate(fraction: 0.67, depth: 0)
                1945-10-15  [Wheat].Sow(cultivar:Rex, depth:30, population:100, rowSpacing:300);
                1947-08-15  [SurfaceOrganicMatter].Incorporate(fraction: 0.67, depth: 0)
                1947-10-15  [Wheat].Sow(cultivar:Rex, depth:30, population:100, rowSpacing:300);
                1949-08-15  [SurfaceOrganicMatter].Incorporate(fraction: 0.67, depth: 0)
                1949-10-15  [Wheat].Sow(cultivar:Rex, depth:30, population:100, rowSpacing:300);
                1951-08-15  [SurfaceOrganicMatter].Incorporate(fraction: 0.67, depth: 0)
                1951-10-15  [Wheat].Sow(cultivar:Rex, depth:30, population:100, rowSpacing:300);
                1953-08-15  [SurfaceOrganicMatter].Incorporate(fraction: 0.67, depth: 0)
                1953-10-15  [Wheat].Sow(cultivar:Rex, depth:30, population:100, rowSpacing:300);
                1955-08-15  [SurfaceOrganicMatter].Incorporate(fraction: 0.67, depth: 0)
                1955-10-15  [Wheat].Sow(cultivar:Rex, depth:30, population:100, rowSpacing:300);
                1957-08-15  [SurfaceOrganicMatter].Incorporate(fraction: 0.67, depth: 0)
                1957-10-15  [Wheat].Sow(cultivar:Rex, depth:30, population:100, rowSpacing:300);
                1959-08-15  [SurfaceOrganicMatter].Incorporate(fraction: 0.67, depth: 0)
                1959-10-15  [Wheat].Sow(cultivar:Rex, depth:30, population:100, rowSpacing:300);
                1961-08-15  [SurfaceOrganicMatter].Incorporate(fraction: 0.67, depth: 0)
                1961-10-15  [Wheat].Sow(cultivar:Rex, depth:30, population:100, rowSpacing:300);
                1963-08-15  [SurfaceOrganicMatter].Incorporate(fraction: 0.67, depth: 0)
                1963-10-15  [Wheat].Sow(cultivar:Rex, depth:30, population:100, rowSpacing:300);
                1965-08-15  [SurfaceOrganicMatter].Incorporate(fraction: 0.67, depth: 0)
                1965-10-15  [Wheat].Sow(cultivar:Stephens, depth:30, population:150, rowSpacing:300);
                1957-08-15  [SurfaceOrganicMatter].Incorporate(fraction: 0.67, depth: 0)
                1967-10-15  [Wheat].Sow(cultivar:Stephens, depth:30, population:150, rowSpacing:300);
                1969-08-15  [SurfaceOrganicMatter].Incorporate(fraction: 0.67, depth: 0)
                1969-10-15  [Wheat].Sow(cultivar:Stephens, depth:30, population:150, rowSpacing:300);
                1971-08-15  [SurfaceOrganicMatter].Incorporate(fraction: 0.67, depth: 0)
                1971-10-15  [Wheat].Sow(cultivar:Stephens, depth:30, population:150, rowSpacing:300);
                1973-08-15  [SurfaceOrganicMatter].Incorporate(fraction: 0.67, depth: 0)
                1973-10-15  [Wheat].Sow(cultivar:Stephens, depth:30, population:150, rowSpacing:300);
                1975-08-15  [SurfaceOrganicMatter].Incorporate(fraction: 0.67, depth: 0)
                1975-10-15  [Wheat].Sow(cultivar:Stephens, depth:30, population:150, rowSpacing:300);
                1977-08-15  [SurfaceOrganicMatter].Incorporate(fraction: 0.67, depth: 0)
                1977-10-15  [Wheat].Sow(cultivar:Stephens, depth:30, population:150, rowSpacing:300);
                1979-08-15  [SurfaceOrganicMatter].Incorporate(fraction: 0.67, depth: 0)
                1979-10-15  [Wheat].Sow(cultivar:Stephens, depth:30, population:150, rowSpacing:300);
                1981-08-15  [SurfaceOrganicMatter].Incorporate(fraction: 0.67, depth: 0)
                1981-10-15  [Wheat].Sow(cultivar:Stephens, depth:30, population:150, rowSpacing:300);
                1983-08-15  [SurfaceOrganicMatter].Incorporate(fraction: 0.67, depth: 0)
                1983-10-15  [Wheat].Sow(cultivar:Stephens, depth:30, population:150, rowSpacing:300);
                1985-08-15  [SurfaceOrganicMatter].Incorporate(fraction: 0.67, depth: 0)
                1985-10-15  [Wheat].Sow(cultivar:Stephens, depth:30, population:150, rowSpacing:300);
                1987-08-15  [SurfaceOrganicMatter].Incorporate(fraction: 0.67, depth: 0)
                1987-10-15  [Wheat].Sow(cultivar:Stephens, depth:30, population:150, rowSpacing:300);
                1989-08-15  [SurfaceOrganicMatter].Incorporate(fraction: 0.67, depth: 0)
                1989-10-15  [Wheat].Sow(cultivar:Stephens, depth:30, population:150, rowSpacing:300);
                1991-08-15  [SurfaceOrganicMatter].Incorporate(fraction: 0.67, depth: 0)
                1991-10-15  [Wheat].Sow(cultivar:Stephens, depth:30, population:150, rowSpacing:300);
                1993-08-15  [SurfaceOrganicMatter].Incorporate(fraction: 0.67, depth: 0)
                1993-10-15  [Wheat].Sow(cultivar:Stephens, depth:30, population:150, rowSpacing:300);
                1995-08-15  [SurfaceOrganicMatter].Incorporate(fraction: 0.67, depth: 0)
                1995-10-15  [Wheat].Sow(cultivar:Stephens, depth:30, population:150, rowSpacing:300);
                1997-08-15  [SurfaceOrganicMatter].Incorporate(fraction: 0.67, depth: 0)
                1997-10-15  [Wheat].Sow(cultivar:Stephens, depth:30, population:150, rowSpacing:300);
                1999-08-15  [SurfaceOrganicMatter].Incorporate(fraction: 0.67, depth: 0)
                1999-10-15  [Wheat].Sow(cultivar:Stephens, depth:30, population:150, rowSpacing:300);
              Operations 7_sBN0
                1931-04-15  [SurfaceOrganicMatter].Incorporate(fraction: 0.55, depth: 0)
                1931-10-15  [Wheat].Sow(cultivar:Rex, depth:30, population:100, rowSpacing:300);
                1933-04-15  [SurfaceOrganicMatter].Incorporate(fraction: 0.55, depth: 0)
                1933-10-15  [Wheat].Sow(cultivar:Rex, depth:30, population:100, rowSpacing:300);
                1935-04-15  [SurfaceOrganicMatter].Incorporate(fraction: 0.55, depth: 0)
                1935-10-15  [Wheat].Sow(cultivar:Rex, depth:30, population:100, rowSpacing:300);
                1937-04-15  [SurfaceOrganicMatter].Incorporate(fraction: 0.55, depth: 0)
                1937-10-15  [Wheat].Sow(cultivar:Rex, depth:30, population:100, rowSpacing:300);
                1939-04-15  [SurfaceOrganicMatter].Incorporate(fraction: 0.55, depth: 0)
                1939-10-15  [Wheat].Sow(cultivar:Rex, depth:30, population:100, rowSpacing:300);
                1941-04-15  [SurfaceOrganicMatter].Incorporate(fraction: 0.55, depth: 0)
                1941-10-15  [Wheat].Sow(cultivar:Rex, depth:30, population:100, rowSpacing:300);
                1943-04-15  [SurfaceOrganicMatter].Incorporate(fraction: 0.55, depth: 0)
                1943-10-15  [Wheat].Sow(cultivar:Rex, depth:30, population:100, rowSpacing:300);
                1945-04-15  [SurfaceOrganicMatter].Incorporate(fraction: 0.55, depth: 0)
                1945-10-15  [Wheat].Sow(cultivar:Rex, depth:30, population:100, rowSpacing:300);
                1947-04-15  [SurfaceOrganicMatter].Incorporate(fraction: 0.55, depth: 0)
                1947-10-15  [Wheat].Sow(cultivar:Rex, depth:30, population:100, rowSpacing:300);
                1949-04-15  [SurfaceOrganicMatter].Incorporate(fraction: 0.55, depth: 0)
                1949-10-15  [Wheat].Sow(cultivar:Rex, depth:30, population:100, rowSpacing:300);
                1951-04-15  [SurfaceOrganicMatter].Incorporate(fraction: 0.55, depth: 0)
                1951-10-15  [Wheat].Sow(cultivar:Rex, depth:30, population:100, rowSpacing:300);
                1953-04-15  [SurfaceOrganicMatter].Incorporate(fraction: 0.55, depth: 0)
                1953-10-15  [Wheat].Sow(cultivar:Rex, depth:30, population:100, rowSpacing:300);
                1955-04-15  [SurfaceOrganicMatter].Incorporate(fraction: 0.55, depth: 0)
                1955-10-15  [Wheat].Sow(cultivar:Rex, depth:30, population:100, rowSpacing:300);
                1957-04-15  [SurfaceOrganicMatter].Incorporate(fraction: 0.55, depth: 0)
                1957-10-15  [Wheat].Sow(cultivar:Rex, depth:30, population:100, rowSpacing:300);
                1959-04-15  [SurfaceOrganicMatter].Incorporate(fraction: 0.55, depth: 0)
                1959-10-15  [Wheat].Sow(cultivar:Rex, depth:30, population:100, rowSpacing:300);
                1961-04-15  [SurfaceOrganicMatter].Incorporate(fraction: 0.55, depth: 0)
                1961-10-15  [Wheat].Sow(cultivar:Rex, depth:30, population:100, rowSpacing:300);
                1963-04-15  [SurfaceOrganicMatter].Incorporate(fraction: 0.55, depth: 0)
                1963-10-15  [Wheat].Sow(cultivar:Rex, depth:30, population:100, rowSpacing:300);
                1965-04-15  [SurfaceOrganicMatter].Incorporate(fraction: 0.55, depth: 0)
                1965-10-15  [Wheat].Sow(cultivar:Stephens, depth:30, population:150, rowSpacing:300);
                1967-04-15  [SurfaceOrganicMatter].Incorporate(fraction: 0.55, depth: 0)
                1967-10-15  [Wheat].Sow(cultivar:Stephens, depth:30, population:150, rowSpacing:300);
                1969-04-15  [SurfaceOrganicMatter].Incorporate(fraction: 0.55, depth: 0)
                1969-10-15  [Wheat].Sow(cultivar:Stephens, depth:30, population:150, rowSpacing:300);
                1971-04-15  [SurfaceOrganicMatter].Incorporate(fraction: 0.55, depth: 0)
                1971-10-15  [Wheat].Sow(cultivar:Stephens, depth:30, population:150, rowSpacing:300);
                1973-04-15  [SurfaceOrganicMatter].Incorporate(fraction: 0.55, depth: 0)
                1973-10-15  [Wheat].Sow(cultivar:Stephens, depth:30, population:150, rowSpacing:300);
                1975-04-15  [SurfaceOrganicMatter].Incorporate(fraction: 0.55, depth: 0)
                1975-10-15  [Wheat].Sow(cultivar:Stephens, depth:30, population:150, rowSpacing:300);
                1977-04-15  [SurfaceOrganicMatter].Incorporate(fraction: 0.55, depth: 0)
                1977-10-15  [Wheat].Sow(cultivar:Stephens, depth:30, population:150, rowSpacing:300);
                1979-04-15  [SurfaceOrganicMatter].Incorporate(fraction: 0.55, depth: 0)
                1979-10-15  [Wheat].Sow(cultivar:Stephens, depth:30, population:150, rowSpacing:300);
                1981-04-15  [SurfaceOrganicMatter].Incorporate(fraction: 0.55, depth: 0)
                1981-10-15  [Wheat].Sow(cultivar:Stephens, depth:30, population:150, rowSpacing:300);
                1983-04-15  [SurfaceOrganicMatter].Incorporate(fraction: 0.55, depth: 0)
                1983-10-15  [Wheat].Sow(cultivar:Stephens, depth:30, population:150, rowSpacing:300);
                1985-04-15  [SurfaceOrganicMatter].Incorporate(fraction: 0.55, depth: 0)
                1985-10-15  [Wheat].Sow(cultivar:Stephens, depth:30, population:150, rowSpacing:300);
                1987-04-15  [SurfaceOrganicMatter].Incorporate(fraction: 0.55, depth: 0)
                1987-10-15  [Wheat].Sow(cultivar:Stephens, depth:30, population:150, rowSpacing:300);
                1989-04-15  [SurfaceOrganicMatter].Incorporate(fraction: 0.55, depth: 0)
                1989-10-15  [Wheat].Sow(cultivar:Stephens, depth:30, population:150, rowSpacing:300);
                1991-04-15  [SurfaceOrganicMatter].Incorporate(fraction: 0.55, depth: 0)
                1991-10-15  [Wheat].Sow(cultivar:Stephens, depth:30, population:150, rowSpacing:300);
                1993-04-15  [SurfaceOrganicMatter].Incorporate(fraction: 0.55, depth: 0)
                1993-10-15  [Wheat].Sow(cultivar:Stephens, depth:30, population:150, rowSpacing:300);
                1995-04-15  [SurfaceOrganicMatter].Incorporate(fraction: 0.55, depth: 0)
                1995-10-15  [Wheat].Sow(cultivar:Stephens, depth:30, population:150, rowSpacing:300);
                1997-04-15  [SurfaceOrganicMatter].Incorporate(fraction: 0.55, depth: 0)
                1997-10-15  [Wheat].Sow(cultivar:Stephens, depth:30, population:150, rowSpacing:300);
                1999-04-15  [SurfaceOrganicMatter].Incorporate(fraction: 0.55, depth: 0)
                1999-10-15  [Wheat].Sow(cultivar:Stephens, depth:30, population:150, rowSpacing:300);
              Operations 0_nBN0
                1931-10-15  [Wheat].Sow(cultivar:Rex, depth:30, population:100, rowSpacing:300);
                1933-10-15  [Wheat].Sow(cultivar:Rex, depth:30, population:100, rowSpacing:300);
                1935-10-15  [Wheat].Sow(cultivar:Rex, depth:30, population:100, rowSpacing:300);
                1937-10-15  [Wheat].Sow(cultivar:Rex, depth:30, population:100, rowSpacing:300);
                1939-10-15  [Wheat].Sow(cultivar:Rex, depth:30, population:100, rowSpacing:300);
                1941-10-15  [Wheat].Sow(cultivar:Rex, depth:30, population:100, rowSpacing:300);
                1943-10-15  [Wheat].Sow(cultivar:Rex, depth:30, population:100, rowSpacing:300);
                1945-10-15  [Wheat].Sow(cultivar:Rex, depth:30, population:100, rowSpacing:300);
                1947-10-15  [Wheat].Sow(cultivar:Rex, depth:30, population:100, rowSpacing:300);
                1949-10-15  [Wheat].Sow(cultivar:Rex, depth:30, population:100, rowSpacing:300);
                1951-10-15  [Wheat].Sow(cultivar:Rex, depth:30, population:100, rowSpacing:300);
                1953-10-15  [Wheat].Sow(cultivar:Rex, depth:30, population:100, rowSpacing:300);
                1955-10-15  [Wheat].Sow(cultivar:Rex, depth:30, population:100, rowSpacing:300);
                1957-10-15  [Wheat].Sow(cultivar:Rex, depth:30, population:100, rowSpacing:300);
                1959-10-15  [Wheat].Sow(cultivar:Rex, depth:30, population:100, rowSpacing:300);
                1961-10-15  [Wheat].Sow(cultivar:Rex, depth:30, population:100, rowSpacing:300);
                1963-10-15  [Wheat].Sow(cultivar:Rex, depth:30, population:100, rowSpacing:300);
                1965-10-15  [Wheat].Sow(cultivar:Stephens, depth:30, population:150, rowSpacing:300);
                1967-10-15  [Wheat].Sow(cultivar:Stephens, depth:30, population:150, rowSpacing:300);
                1969-10-15  [Wheat].Sow(cultivar:Stephens, depth:30, population:150, rowSpacing:300);
                1971-10-15  [Wheat].Sow(cultivar:Stephens, depth:30, population:150, rowSpacing:300);
                1973-10-15  [Wheat].Sow(cultivar:Stephens, depth:30, population:150, rowSpacing:300);
                1975-10-15  [Wheat].Sow(cultivar:Stephens, depth:30, population:150, rowSpacing:300);
                1977-10-15  [Wheat].Sow(cultivar:Stephens, depth:30, population:150, rowSpacing:300);
                1979-10-15  [Wheat].Sow(cultivar:Stephens, depth:30, population:150, rowSpacing:300);
                1981-10-15  [Wheat].Sow(cultivar:Stephens, depth:30, population:150, rowSpacing:300);
                1983-10-15  [Wheat].Sow(cultivar:Stephens, depth:30, population:150, rowSpacing:300);
                1985-10-15  [Wheat].Sow(cultivar:Stephens, depth:30, population:150, rowSpacing:300);
                1987-10-15  [Wheat].Sow(cultivar:Stephens, depth:30, population:150, rowSpacing:300);
                1989-10-15  [Wheat].Sow(cultivar:Stephens, depth:30, population:150, rowSpacing:300);
                1991-10-15  [Wheat].Sow(cultivar:Stephens, depth:30, population:150, rowSpacing:300);
                1993-10-15  [Wheat].Sow(cultivar:Stephens, depth:30, population:150, rowSpacing:300);
                1995-10-15  [Wheat].Sow(cultivar:Stephens, depth:30, population:150, rowSpacing:300);
                1997-10-15  [Wheat].Sow(cultivar:Stephens, depth:30, population:150, rowSpacing:300);
                1999-10-15  [Wheat].Sow(cultivar:Stephens, depth:30, population:150, rowSpacing:300);
              Operations 2_sBN45
                1931-08-15  [SurfaceOrganicMatter].Incorporate(fraction: 0.6, depth: 200)
                1931-10-15  [Wheat].Sow(cultivar:Rex, depth:30, population:100, rowSpacing:300);
                1933-08-15  [SurfaceOrganicMatter].Incorporate(fraction: 0.6, depth: 200)
                1933-10-15  [Wheat].Sow(cultivar:Rex, depth:30, population:100, rowSpacing:300);
                1935-08-15  [SurfaceOrganicMatter].Incorporate(fraction: 0.6, depth: 200)
                1935-10-15  [Wheat].Sow(cultivar:Rex, depth:30, population:100, rowSpacing:300);
                1937-08-15  [SurfaceOrganicMatter].Incorporate(fraction: 0.6, depth: 200)
                1937-10-15  [Wheat].Sow(cultivar:Rex, depth:30, population:100, rowSpacing:300);
                1939-08-15  [SurfaceOrganicMatter].Incorporate(fraction: 0.6, depth: 200)
                1939-10-15  [Wheat].Sow(cultivar:Rex, depth:30, population:100, rowSpacing:300);
                1941-08-15  [SurfaceOrganicMatter].Incorporate(fraction: 0.6, depth: 200)
                1941-10-15  [Wheat].Sow(cultivar:Rex, depth:30, population:100, rowSpacing:300);
                1943-08-15  [SurfaceOrganicMatter].Incorporate(fraction: 0.6, depth: 200)
                1943-10-15  [Wheat].Sow(cultivar:Rex, depth:30, population:100, rowSpacing:300);
                1945-08-15  [SurfaceOrganicMatter].Incorporate(fraction: 0.6, depth: 200)
                1945-10-15  [Wheat].Sow(cultivar:Rex, depth:30, population:100, rowSpacing:300);
                1947-08-15  [SurfaceOrganicMatter].Incorporate(fraction: 0.6, depth: 200)
                1947-10-15  [Wheat].Sow(cultivar:Rex, depth:30, population:100, rowSpacing:300);
                1949-08-15  [SurfaceOrganicMatter].Incorporate(fraction: 0.6, depth: 200)
                1949-10-15  [Wheat].Sow(cultivar:Rex, depth:30, population:100, rowSpacing:300);
                1951-08-15  [SurfaceOrganicMatter].Incorporate(fraction: 0.6, depth: 200)
                1951-10-15  [Wheat].Sow(cultivar:Rex, depth:30, population:100, rowSpacing:300);
                1953-08-15  [SurfaceOrganicMatter].Incorporate(fraction: 0.6, depth: 200)
                1953-10-15  [Wheat].Sow(cultivar:Rex, depth:30, population:100, rowSpacing:300);
                1955-08-15  [SurfaceOrganicMatter].Incorporate(fraction: 0.6, depth: 200)
                1955-10-15  [Wheat].Sow(cultivar:Rex, depth:30, population:100, rowSpacing:300);
                1957-08-15  [SurfaceOrganicMatter].Incorporate(fraction: 0.6, depth: 200)
                1957-10-15  [Wheat].Sow(cultivar:Rex, depth:30, population:100, rowSpacing:300);
                1959-08-15  [SurfaceOrganicMatter].Incorporate(fraction: 0.6, depth: 200)
                1959-10-15  [Wheat].Sow(cultivar:Rex, depth:30, population:100, rowSpacing:300);
                1961-08-15  [SurfaceOrganicMatter].Incorporate(fraction: 0.6, depth: 200)
                1961-10-15  [Wheat].Sow(cultivar:Rex, depth:30, population:100, rowSpacing:300);
                1963-08-15  [SurfaceOrganicMatter].Incorporate(fraction: 0.6, depth: 200)
                1963-10-15  [Wheat].Sow(cultivar:Rex, depth:30, population:100, rowSpacing:300);
                1965-08-15  [SurfaceOrganicMatter].Incorporate(fraction: 0.6, depth: 200)
                1965-10-15  [Wheat].Sow(cultivar:Stephens, depth:30, population:150, rowSpacing:300);
                1967-10-15  [Fertiliser].Apply(Amount: 45, Type: Fertiliser.Types.NO3N);
                1967-10-15  [Wheat].Sow(cultivar:Stephens, depth:30, population:150, rowSpacing:300);
                1969-10-15  [Fertiliser].Apply(Amount: 45, Type: Fertiliser.Types.NO3N);
                1969-10-15  [Wheat].Sow(cultivar:Stephens, depth:30, population:150, rowSpacing:300);
                1971-10-15  [Fertiliser].Apply(Amount: 45, Type: Fertiliser.Types.NO3N);
                1971-10-15  [Wheat].Sow(cultivar:Stephens, depth:30, population:150, rowSpacing:300);
                1973-10-15  [Fertiliser].Apply(Amount: 45, Type: Fertiliser.Types.NO3N);
                1973-10-15  [Wheat].Sow(cultivar:Stephens, depth:30, population:150, rowSpacing:300);
                1975-10-15  [Fertiliser].Apply(Amount: 45, Type: Fertiliser.Types.NO3N);
                1975-10-15  [Wheat].Sow(cultivar:Stephens, depth:30, population:150, rowSpacing:300);
                1977-10-15  [Fertiliser].Apply(Amount: 45, Type: Fertiliser.Types.NO3N);
                1977-10-15  [Wheat].Sow(cultivar:Stephens, depth:30, population:150, rowSpacing:300);
                1979-10-15  [Fertiliser].Apply(Amount: 45, Type: Fertiliser.Types.NO3N);
                1979-10-15  [Wheat].Sow(cultivar:Stephens, depth:30, population:150, rowSpacing:300);
                1981-04-15  [SurfaceOrganicMatter].Incorporate(fraction: 0.55, depth: 0)
                1981-10-15  [Fertiliser].Apply(Amount: 45, Type: Fertiliser.Types.NO3N);
                1981-10-15  [Wheat].Sow(cultivar:Stephens, depth:30, population:150, rowSpacing:300);
                1983-04-15  [SurfaceOrganicMatter].Incorporate(fraction: 0.55, depth: 0)
                1983-10-15  [Fertiliser].Apply(Amount: 45, Type: Fertiliser.Types.NO3N);
                1983-10-15  [Wheat].Sow(cultivar:Stephens, depth:30, population:150, rowSpacing:300);
                1985-04-15  [SurfaceOrganicMatter].Incorporate(fraction: 0.55, depth: 0)
                1985-10-15  [Fertiliser].Apply(Amount: 45, Type: Fertiliser.Types.NO3N);
                1985-10-15  [Wheat].Sow(cultivar:Stephens, depth:30, population:150, rowSpacing:300);
                1987-04-15  [SurfaceOrganicMatter].Incorporate(fraction: 0.55, depth: 0)
                1987-10-15  [Fertiliser].Apply(Amount: 45, Type: Fertiliser.Types.NO3N);
                1987-10-15  [Wheat].Sow(cultivar:Stephens, depth:30, population:150, rowSpacing:300);
                1989-04-15  [SurfaceOrganicMatter].Incorporate(fraction: 0.55, depth: 0)
                1989-10-15  [Fertiliser].Apply(Amount: 45, Type: Fertiliser.Types.NO3N);
                1989-10-15  [Wheat].Sow(cultivar:Stephens, depth:30, population:150, rowSpacing:300);
                1991-04-15  [SurfaceOrganicMatter].Incorporate(fraction: 0.55, depth: 0)
                1991-10-15  [Fertiliser].Apply(Amount: 45, Type: Fertiliser.Types.NO3N);
                1991-10-15  [Wheat].Sow(cultivar:Stephens, depth:30, population:150, rowSpacing:300);
                1993-04-15  [SurfaceOrganicMatter].Incorporate(fraction: 0.55, depth: 0)
                1993-10-15  [Fertiliser].Apply(Amount: 45, Type: Fertiliser.Types.NO3N);
                1993-10-15  [Wheat].Sow(cultivar:Stephens, depth:30, population:150, rowSpacing:300);
                1995-04-15  [SurfaceOrganicMatter].Incorporate(fraction: 0.55, depth: 0)
                1995-10-15  [Fertiliser].Apply(Amount: 45, Type: Fertiliser.Types.NO3N);
                1995-10-15  [Wheat].Sow(cultivar:Stephens, depth:30, population:150, rowSpacing:300);
                1997-04-15  [SurfaceOrganicMatter].Incorporate(fraction: 0.55, depth: 0)
                1997-10-15  [Fertiliser].Apply(Amount: 45, Type: Fertiliser.Types.NO3N);
                1997-10-15  [Wheat].Sow(cultivar:Stephens, depth:30, population:150, rowSpacing:300);
                1999-04-15  [SurfaceOrganicMatter].Incorporate(fraction: 0.55, depth: 0)
                1999-10-15  [Fertiliser].Apply(Amount: 45, Type: Fertiliser.Types.NO3N);
                1999-10-15  [Wheat].Sow(cultivar:Stephens, depth:30, population:150, rowSpacing:300);
              Operations 3_sBN90
                1931-04-01  [SurfaceOrganicMatter].Incorporate(fraction: 0.6, depth: 200)
                1931-10-15  [Wheat].Sow(cultivar:Rex, depth:30, population:100, rowSpacing:300);
                1933-04-01  [SurfaceOrganicMatter].Incorporate(fraction: 0.6, depth: 200)
                1933-10-15  [Wheat].Sow(cultivar:Rex, depth:30, population:100, rowSpacing:300);
                1935-04-01  [SurfaceOrganicMatter].Incorporate(fraction: 0.6, depth: 200)
                1935-10-15  [Wheat].Sow(cultivar:Rex, depth:30, population:100, rowSpacing:300);
                1937-04-01  [SurfaceOrganicMatter].Incorporate(fraction: 0.6, depth: 200)
                1937-10-15  [Wheat].Sow(cultivar:Rex, depth:30, population:100, rowSpacing:300);
                1939-04-01  [SurfaceOrganicMatter].Incorporate(fraction: 0.6, depth: 200)
                1939-10-15  [Wheat].Sow(cultivar:Rex, depth:30, population:100, rowSpacing:300);
                1941-04-01  [SurfaceOrganicMatter].Incorporate(fraction: 0.6, depth: 200)
                1941-10-15  [Wheat].Sow(cultivar:Rex, depth:30, population:100, rowSpacing:300);
                1943-04-01  [SurfaceOrganicMatter].Incorporate(fraction: 0.6, depth: 200)
                1943-10-15  [Wheat].Sow(cultivar:Rex, depth:30, population:100, rowSpacing:300);
                1945-04-01  [SurfaceOrganicMatter].Incorporate(fraction: 0.6, depth: 200)
                1945-10-15  [Wheat].Sow(cultivar:Rex, depth:30, population:100, rowSpacing:300);
                1947-04-01  [SurfaceOrganicMatter].Incorporate(fraction: 0.6, depth: 200)
                1947-10-15  [Wheat].Sow(cultivar:Rex, depth:30, population:100, rowSpacing:300);
                1949-04-01  [SurfaceOrganicMatter].Incorporate(fraction: 0.6, depth: 200)
                1949-10-15  [Wheat].Sow(cultivar:Rex, depth:30, population:100, rowSpacing:300);
                1951-04-01  [SurfaceOrganicMatter].Incorporate(fraction: 0.6, depth: 200)
                1951-10-15  [Wheat].Sow(cultivar:Rex, depth:30, population:100, rowSpacing:300);
                1953-04-01  [SurfaceOrganicMatter].Incorporate(fraction: 0.6, depth: 200)
                1953-10-15  [Wheat].Sow(cultivar:Rex, depth:30, population:100, rowSpacing:300);
                1955-04-01  [SurfaceOrganicMatter].Incorporate(fraction: 0.6, depth: 200)
                1955-10-15  [Wheat].Sow(cultivar:Rex, depth:30, population:100, rowSpacing:300);
                1957-04-01  [SurfaceOrganicMatter].Incorporate(fraction: 0.6, depth: 200)
                1957-10-15  [Wheat].Sow(cultivar:Rex, depth:30, population:100, rowSpacing:300);
                1959-04-01  [SurfaceOrganicMatter].Incorporate(fraction: 0.6, depth: 200)
                1959-10-15  [Wheat].Sow(cultivar:Rex, depth:30, population:100, rowSpacing:300);
                1961-04-01  [SurfaceOrganicMatter].Incorporate(fraction: 0.6, depth: 200)
                1961-10-15  [Wheat].Sow(cultivar:Rex, depth:30, population:100, rowSpacing:300);
                1963-04-01  [SurfaceOrganicMatter].Incorporate(fraction: 0.6, depth: 200)
                1963-10-15  [Wheat].Sow(cultivar:Rex, depth:30, population:100, rowSpacing:300);
                1965-04-01  [SurfaceOrganicMatter].Incorporate(fraction: 0.6, depth: 200)
                1965-10-15  [Wheat].Sow(cultivar:Stephens, depth:30, population:150, rowSpacing:300);
                1967-10-15  [Fertiliser].Apply(Amount: 90, Type: Fertiliser.Types.NO3N);
                1967-10-15  [Wheat].Sow(cultivar:Stephens, depth:30, population:150, rowSpacing:300);
                1969-10-15  [Fertiliser].Apply(Amount: 90, Type: Fertiliser.Types.NO3N);
                1969-10-15  [Wheat].Sow(cultivar:Stephens, depth:30, population:150, rowSpacing:300);
                1971-10-15  [Fertiliser].Apply(Amount: 90, Type: Fertiliser.Types.NO3N);
                1971-10-15  [Wheat].Sow(cultivar:Stephens, depth:30, population:150, rowSpacing:300);
                1973-10-15  [Fertiliser].Apply(Amount: 90, Type: Fertiliser.Types.NO3N);
                1973-10-15  [Wheat].Sow(cultivar:Stephens, depth:30, population:150, rowSpacing:300);
                1975-10-15  [Fertiliser].Apply(Amount: 90, Type: Fertiliser.Types.NO3N);
                1975-10-15  [Wheat].Sow(cultivar:Stephens, depth:30, population:150, rowSpacing:300);
                1977-10-15  [Fertiliser].Apply(Amount: 90, Type: Fertiliser.Types.NO3N);
                1977-10-15  [Wheat].Sow(cultivar:Stephens, depth:30, population:150, rowSpacing:300);
                1979-10-15  [Fertiliser].Apply(Amount: 90, Type: Fertiliser.Types.NO3N);
                1979-10-15  [Wheat].Sow(cultivar:Stephens, depth:30, population:150, rowSpacing:300);
                1981-04-15  [SurfaceOrganicMatter].Incorporate(fraction: 0.55, depth: 0)
                1981-10-15  [Fertiliser].Apply(Amount: 90, Type: Fertiliser.Types.NO3N);
                1981-10-15  [Wheat].Sow(cultivar:Stephens, depth:30, population:150, rowSpacing:300);
                1983-04-15  [SurfaceOrganicMatter].Incorporate(fraction: 0.55, depth: 0)
                1983-10-15  [Fertiliser].Apply(Amount: 90, Type: Fertiliser.Types.NO3N);
                1983-10-15  [Wheat].Sow(cultivar:Stephens, depth:30, population:150, rowSpacing:300);
                1985-04-15  [SurfaceOrganicMatter].Incorporate(fraction: 0.55, depth: 0)
                1985-10-15  [Fertiliser].Apply(Amount: 90, Type: Fertiliser.Types.NO3N);
                1985-10-15  [Wheat].Sow(cultivar:Stephens, depth:30, population:150, rowSpacing:300);
                1987-04-15  [SurfaceOrganicMatter].Incorporate(fraction: 0.55, depth: 0)
                1987-10-15  [Fertiliser].Apply(Amount: 90, Type: Fertiliser.Types.NO3N);
                1987-10-15  [Wheat].Sow(cultivar:Stephens, depth:30, population:150, rowSpacing:300);
                1989-04-15  [SurfaceOrganicMatter].Incorporate(fraction: 0.55, depth: 0)
                1989-10-15  [Fertiliser].Apply(Amount: 90, Type: Fertiliser.Types.NO3N);
                1989-10-15  [Wheat].Sow(cultivar:Stephens, depth:30, population:150, rowSpacing:300);
                1991-04-15  [SurfaceOrganicMatter].Incorporate(fraction: 0.55, depth: 0)
                1991-10-15  [Fertiliser].Apply(Amount: 90, Type: Fertiliser.Types.NO3N);
                1991-10-15  [Wheat].Sow(cultivar:Stephens, depth:30, population:150, rowSpacing:300);
                1993-04-15  [SurfaceOrganicMatter].Incorporate(fraction: 0.55, depth: 0)
                1993-10-15  [Fertiliser].Apply(Amount: 90, Type: Fertiliser.Types.NO3N);
                1993-10-15  [Wheat].Sow(cultivar:Stephens, depth:30, population:150, rowSpacing:300);
                1995-04-15  [SurfaceOrganicMatter].Incorporate(fraction: 0.55, depth: 0)
                1995-10-15  [Fertiliser].Apply(Amount: 90, Type: Fertiliser.Types.NO3N);
                1995-10-15  [Wheat].Sow(cultivar:Stephens, depth:30, population:150, rowSpacing:300);
                1997-04-15  [SurfaceOrganicMatter].Incorporate(fraction: 0.55, depth: 0)
                1997-10-15  [Fertiliser].Apply(Amount: 90, Type: Fertiliser.Types.NO3N);
                1997-10-15  [Wheat].Sow(cultivar:Stephens, depth:30, population:150, rowSpacing:300);
                1999-04-15  [SurfaceOrganicMatter].Incorporate(fraction: 0.55, depth: 0)
                1999-10-15  [Fertiliser].Apply(Amount: 90, Type: Fertiliser.Types.NO3N);
                1999-10-15  [Wheat].Sow(cultivar:Stephens, depth:30, population:150, rowSpacing:300);
              Operations 4_nBN45
                1931-08-15  [SurfaceOrganicMatter].Incorporate(fraction: 0.6, depth: 200)
                1931-10-15  [Fertiliser].Apply(Amount: 34, Type: Fertiliser.Types.NO3N);
                1931-10-15  [Wheat].Sow(cultivar:Rex, depth:30, population:100, rowSpacing:300);
                1933-08-15  [SurfaceOrganicMatter].Incorporate(fraction: 0.6, depth: 200)
                1933-10-15  [Fertiliser].Apply(Amount: 34, Type: Fertiliser.Types.NO3N);
                1933-10-15  [Wheat].Sow(cultivar:Rex, depth:30, population:100, rowSpacing:300);
                1935-08-15  [SurfaceOrganicMatter].Incorporate(fraction: 0.6, depth: 200)
                1935-10-15  [Fertiliser].Apply(Amount: 34, Type: Fertiliser.Types.NO3N);
                1935-10-15  [Wheat].Sow(cultivar:Rex, depth:30, population:100, rowSpacing:300);
                1937-08-15  [SurfaceOrganicMatter].Incorporate(fraction: 0.6, depth: 200)
                1937-10-15  [Fertiliser].Apply(Amount: 34, Type: Fertiliser.Types.NO3N);
                1937-10-15  [Wheat].Sow(cultivar:Rex, depth:30, population:100, rowSpacing:300);
                1939-08-15  [SurfaceOrganicMatter].Incorporate(fraction: 0.6, depth: 200)
                1939-10-15  [Fertiliser].Apply(Amount: 34, Type: Fertiliser.Types.NO3N);
                1939-10-15  [Wheat].Sow(cultivar:Rex, depth:30, population:100, rowSpacing:300);
                1941-08-15  [SurfaceOrganicMatter].Incorporate(fraction: 0.6, depth: 200)
                1941-10-15  [Fertiliser].Apply(Amount: 34, Type: Fertiliser.Types.NO3N);
                1941-10-15  [Wheat].Sow(cultivar:Rex, depth:30, population:100, rowSpacing:300);
                1943-08-15  [SurfaceOrganicMatter].Incorporate(fraction: 0.6, depth: 200)
                1943-10-15  [Fertiliser].Apply(Amount: 34, Type: Fertiliser.Types.NO3N);
                1943-10-15  [Wheat].Sow(cultivar:Rex, depth:30, population:100, rowSpacing:300);
                1945-08-15  [SurfaceOrganicMatter].Incorporate(fraction: 0.6, depth: 200)
                1945-10-15  [Fertiliser].Apply(Amount: 34, Type: Fertiliser.Types.NO3N);
                1945-10-15  [Wheat].Sow(cultivar:Rex, depth:30, population:100, rowSpacing:300);
                1947-08-15  [SurfaceOrganicMatter].Incorporate(fraction: 0.6, depth: 200)
                1947-10-15  [Fertiliser].Apply(Amount: 34, Type: Fertiliser.Types.NO3N);
                1947-10-15  [Wheat].Sow(cultivar:Rex, depth:30, population:100, rowSpacing:300);
                1949-08-15  [SurfaceOrganicMatter].Incorporate(fraction: 0.6, depth: 200)
                1949-10-15  [Fertiliser].Apply(Amount: 34, Type: Fertiliser.Types.NO3N);
                1949-10-15  [Wheat].Sow(cultivar:Rex, depth:30, population:100, rowSpacing:300);
                1951-08-15  [SurfaceOrganicMatter].Incorporate(fraction: 0.6, depth: 200)
                1951-10-15  [Fertiliser].Apply(Amount: 34, Type: Fertiliser.Types.NO3N);
                1951-10-15  [Wheat].Sow(cultivar:Rex, depth:30, population:100, rowSpacing:300);
                1953-08-15  [SurfaceOrganicMatter].Incorporate(fraction: 0.6, depth: 200)
                1953-10-15  [Fertiliser].Apply(Amount: 34, Type: Fertiliser.Types.NO3N);
                1953-10-15  [Wheat].Sow(cultivar:Rex, depth:30, population:100, rowSpacing:300);
                1955-08-15  [SurfaceOrganicMatter].Incorporate(fraction: 0.6, depth: 200)
                1955-10-15  [Fertiliser].Apply(Amount: 34, Type: Fertiliser.Types.NO3N);
                1955-10-15  [Wheat].Sow(cultivar:Rex, depth:30, population:100, rowSpacing:300);
                1957-08-15  [SurfaceOrganicMatter].Incorporate(fraction: 0.6, depth: 200)
                1957-10-15  [Fertiliser].Apply(Amount: 34, Type: Fertiliser.Types.NO3N);
                1957-10-15  [Wheat].Sow(cultivar:Rex, depth:30, population:100, rowSpacing:300);
                1959-08-15  [SurfaceOrganicMatter].Incorporate(fraction: 0.6, depth: 200)
                1959-10-15  [Fertiliser].Apply(Amount: 34, Type: Fertiliser.Types.NO3N);
                1959-10-15  [Wheat].Sow(cultivar:Rex, depth:30, population:100, rowSpacing:300);
                1961-08-15  [SurfaceOrganicMatter].Incorporate(fraction: 0.6, depth: 200)
                1961-10-15  [Fertiliser].Apply(Amount: 34, Type: Fertiliser.Types.NO3N);
                1961-10-15  [Wheat].Sow(cultivar:Rex, depth:30, population:100, rowSpacing:300);
                1963-08-15  [SurfaceOrganicMatter].Incorporate(fraction: 0.6, depth: 200)
                1963-10-15  [Fertiliser].Apply(Amount: 34, Type: Fertiliser.Types.NO3N);
                1963-10-15  [Wheat].Sow(cultivar:Rex, depth:30, population:100, rowSpacing:300);
                1965-08-15  [SurfaceOrganicMatter].Incorporate(fraction: 0.6, depth: 200)
                1965-10-15  [Fertiliser].Apply(Amount: 34, Type: Fertiliser.Types.NO3N);
                1965-10-15  [Wheat].Sow(cultivar:Stephens, depth:30, population:150, rowSpacing:300);
                1967-10-15  [Fertiliser].Apply(Amount: 45, Type: Fertiliser.Types.NO3N);
                1967-10-15  [Wheat].Sow(cultivar:Stephens, depth:30, population:150, rowSpacing:300);
                1969-10-15  [Fertiliser].Apply(Amount: 45, Type: Fertiliser.Types.NO3N);
                1969-10-15  [Wheat].Sow(cultivar:Stephens, depth:30, population:150, rowSpacing:300);
                1971-10-15  [Fertiliser].Apply(Amount: 45, Type: Fertiliser.Types.NO3N);
                1971-10-15  [Wheat].Sow(cultivar:Stephens, depth:30, population:150, rowSpacing:300);
                1973-10-15  [Fertiliser].Apply(Amount: 45, Type: Fertiliser.Types.NO3N);
                1973-10-15  [Wheat].Sow(cultivar:Stephens, depth:30, population:150, rowSpacing:300);
                1975-10-15  [Fertiliser].Apply(Amount: 45, Type: Fertiliser.Types.NO3N);
                1975-10-15  [Wheat].Sow(cultivar:Stephens, depth:30, population:150, rowSpacing:300);
                1977-10-15  [Fertiliser].Apply(Amount: 45, Type: Fertiliser.Types.NO3N);
                1977-10-15  [Wheat].Sow(cultivar:Stephens, depth:30, population:150, rowSpacing:300);
                1979-10-15  [Fertiliser].Apply(Amount: 45, Type: Fertiliser.Types.NO3N);
                1979-10-15  [Wheat].Sow(cultivar:Stephens, depth:30, population:150, rowSpacing:300);
                1981-10-15  [Fertiliser].Apply(Amount: 45, Type: Fertiliser.Types.NO3N);
                1981-10-15  [Wheat].Sow(cultivar:Stephens, depth:30, population:150, rowSpacing:300);
                1983-10-15  [Fertiliser].Apply(Amount: 45, Type: Fertiliser.Types.NO3N);
                1983-10-15  [Wheat].Sow(cultivar:Stephens, depth:30, population:150, rowSpacing:300);
                1985-10-15  [Fertiliser].Apply(Amount: 45, Type: Fertiliser.Types.NO3N);
                1985-10-15  [Wheat].Sow(cultivar:Stephens, depth:30, population:150, rowSpacing:300);
                1987-10-15  [Fertiliser].Apply(Amount: 45, Type: Fertiliser.Types.NO3N);
                1987-10-15  [Wheat].Sow(cultivar:Stephens, depth:30, population:150, rowSpacing:300);
                1989-10-15  [Fertiliser].Apply(Amount: 45, Type: Fertiliser.Types.NO3N);
                1989-10-15  [Wheat].Sow(cultivar:Stephens, depth:30, population:150, rowSpacing:300);
                1991-10-15  [Fertiliser].Apply(Amount: 45, Type: Fertiliser.Types.NO3N);
                1991-10-15  [Wheat].Sow(cultivar:Stephens, depth:30, population:150, rowSpacing:300);
                1993-10-15  [Fertiliser].Apply(Amount: 45, Type: Fertiliser.Types.NO3N);
                1993-10-15  [Wheat].Sow(cultivar:Stephens, depth:30, population:150, rowSpacing:300);
                1995-10-15  [Fertiliser].Apply(Amount: 45, Type: Fertiliser.Types.NO3N);
                1995-10-15  [Wheat].Sow(cultivar:Stephens, depth:30, population:150, rowSpacing:300);
                1997-10-15  [Fertiliser].Apply(Amount: 45, Type: Fertiliser.Types.NO3N);
                1997-10-15  [Wheat].Sow(cultivar:Stephens, depth:30, population:150, rowSpacing:300);
                1999-10-15  [Fertiliser].Apply(Amount: 45, Type: Fertiliser.Types.NO3N);
                1999-10-15  [Wheat].Sow(cultivar:Stephens, depth:30, population:150, rowSpacing:300);
              Operations 5_nBN90
                1931-04-01  [SurfaceOrganicMatter].Incorporate(fraction: 0.6, depth: 200)
                1931-10-15  [Fertiliser].Apply(Amount: 34, Type: Fertiliser.Types.NO3N);
                1931-10-15  [Wheat].Sow(cultivar:Rex, depth:30, population:100, rowSpacing:300);
                1933-04-01  [SurfaceOrganicMatter].Incorporate(fraction: 0.6, depth: 200)
                1933-10-15  [Fertiliser].Apply(Amount: 34, Type: Fertiliser.Types.NO3N);
                1933-10-15  [Wheat].Sow(cultivar:Rex, depth:30, population:100, rowSpacing:300);
                1935-04-01  [SurfaceOrganicMatter].Incorporate(fraction: 0.6, depth: 200)
                1935-10-15  [Fertiliser].Apply(Amount: 34, Type: Fertiliser.Types.NO3N);
                1935-10-15  [Wheat].Sow(cultivar:Rex, depth:30, population:100, rowSpacing:300);
                1937-04-01  [SurfaceOrganicMatter].Incorporate(fraction: 0.6, depth: 200)
                1937-10-15  [Fertiliser].Apply(Amount: 34, Type: Fertiliser.Types.NO3N);
                1937-10-15  [Wheat].Sow(cultivar:Rex, depth:30, population:100, rowSpacing:300);
                1939-04-01  [SurfaceOrganicMatter].Incorporate(fraction: 0.6, depth: 200)
                1939-10-15  [Fertiliser].Apply(Amount: 34, Type: Fertiliser.Types.NO3N);
                1939-10-15  [Wheat].Sow(cultivar:Rex, depth:30, population:100, rowSpacing:300);
                1941-04-01  [SurfaceOrganicMatter].Incorporate(fraction: 0.6, depth: 200)
                1941-10-15  [Fertiliser].Apply(Amount: 34, Type: Fertiliser.Types.NO3N);
                1941-10-15  [Wheat].Sow(cultivar:Rex, depth:30, population:100, rowSpacing:300);
                1943-04-01  [SurfaceOrganicMatter].Incorporate(fraction: 0.6, depth: 200)
                1943-10-15  [Fertiliser].Apply(Amount: 34, Type: Fertiliser.Types.NO3N);
                1943-10-15  [Wheat].Sow(cultivar:Rex, depth:30, population:100, rowSpacing:300);
                1945-04-01  [SurfaceOrganicMatter].Incorporate(fraction: 0.6, depth: 200)
                1945-10-15  [Fertiliser].Apply(Amount: 34, Type: Fertiliser.Types.NO3N);
                1945-10-15  [Wheat].Sow(cultivar:Rex, depth:30, population:100, rowSpacing:300);
                1947-04-01  [SurfaceOrganicMatter].Incorporate(fraction: 0.6, depth: 200)
                1947-10-15  [Fertiliser].Apply(Amount: 34, Type: Fertiliser.Types.NO3N);
                1947-10-15  [Wheat].Sow(cultivar:Rex, depth:30, population:100, rowSpacing:300);
                1949-04-01  [SurfaceOrganicMatter].Incorporate(fraction: 0.6, depth: 200)
                1949-10-15  [Fertiliser].Apply(Amount: 34, Type: Fertiliser.Types.NO3N);
                1949-10-15  [Wheat].Sow(cultivar:Rex, depth:30, population:100, rowSpacing:300);
                1951-04-01  [SurfaceOrganicMatter].Incorporate(fraction: 0.6, depth: 200)
                1951-10-15  [Fertiliser].Apply(Amount: 34, Type: Fertiliser.Types.NO3N);
                1951-10-15  [Wheat].Sow(cultivar:Rex, depth:30, population:100, rowSpacing:300);
                1953-04-01  [SurfaceOrganicMatter].Incorporate(fraction: 0.6, depth: 200)
                1953-10-15  [Fertiliser].Apply(Amount: 34, Type: Fertiliser.Types.NO3N);
                1953-10-15  [Wheat].Sow(cultivar:Rex, depth:30, population:100, rowSpacing:300);
                1955-04-01  [SurfaceOrganicMatter].Incorporate(fraction: 0.6, depth: 200)
                1955-10-15  [Fertiliser].Apply(Amount: 34, Type: Fertiliser.Types.NO3N);
                1955-10-15  [Wheat].Sow(cultivar:Rex, depth:30, population:100, rowSpacing:300);
                1957-04-01  [SurfaceOrganicMatter].Incorporate(fraction: 0.6, depth: 200)
                1957-10-15  [Fertiliser].Apply(Amount: 34, Type: Fertiliser.Types.NO3N);
                1957-10-15  [Wheat].Sow(cultivar:Rex, depth:30, population:100, rowSpacing:300);
                1959-04-01  [SurfaceOrganicMatter].Incorporate(fraction: 0.6, depth: 200)
                1959-10-15  [Fertiliser].Apply(Amount: 34, Type: Fertiliser.Types.NO3N);
                1959-10-15  [Wheat].Sow(cultivar:Rex, depth:30, population:100, rowSpacing:300);
                1961-04-01  [SurfaceOrganicMatter].Incorporate(fraction: 0.6, depth: 200)
                1961-10-15  [Fertiliser].Apply(Amount: 34, Type: Fertiliser.Types.NO3N);
                1961-10-15  [Wheat].Sow(cultivar:Rex, depth:30, population:100, rowSpacing:300);
                1963-04-01  [SurfaceOrganicMatter].Incorporate(fraction: 0.6, depth: 200)
                1963-10-15  [Fertiliser].Apply(Amount: 34, Type: Fertiliser.Types.NO3N);
                1963-10-15  [Wheat].Sow(cultivar:Rex, depth:30, population:100, rowSpacing:300);
                1965-04-01  [SurfaceOrganicMatter].Incorporate(fraction: 0.6, depth: 200)
                1965-10-15  [Fertiliser].Apply(Amount: 34, Type: Fertiliser.Types.NO3N);
                1965-10-15  [Wheat].Sow(cultivar:Stephens, depth:30, population:150, rowSpacing:300);
                1967-10-15  [Fertiliser].Apply(Amount: 90, Type: Fertiliser.Types.NO3N);
                1967-10-15  [Wheat].Sow(cultivar:Stephens, depth:30, population:150, rowSpacing:300);
                1969-10-15  [Fertiliser].Apply(Amount: 90, Type: Fertiliser.Types.NO3N);
                1969-10-15  [Wheat].Sow(cultivar:Stephens, depth:30, population:150, rowSpacing:300);
                1971-10-15  [Fertiliser].Apply(Amount: 90, Type: Fertiliser.Types.NO3N);
                1971-10-15  [Wheat].Sow(cultivar:Stephens, depth:30, population:150, rowSpacing:300);
                1973-10-15  [Fertiliser].Apply(Amount: 90, Type: Fertiliser.Types.NO3N);
                1973-10-15  [Wheat].Sow(cultivar:Stephens, depth:30, population:150, rowSpacing:300);
                1975-10-15  [Fertiliser].Apply(Amount: 90, Type: Fertiliser.Types.NO3N);
                1975-10-15  [Wheat].Sow(cultivar:Stephens, depth:30, population:150, rowSpacing:300);
                1977-10-15  [Fertiliser].Apply(Amount: 90, Type: Fertiliser.Types.NO3N);
                1977-10-15  [Wheat].Sow(cultivar:Stephens, depth:30, population:150, rowSpacing:300);
                1979-10-15  [Fertiliser].Apply(Amount: 90, Type: Fertiliser.Types.NO3N);
                1979-10-15  [Wheat].Sow(cultivar:Stephens, depth:30, population:150, rowSpacing:300);
                1981-10-15  [Fertiliser].Apply(Amount: 90, Type: Fertiliser.Types.NO3N);
                1981-10-15  [Wheat].Sow(cultivar:Stephens, depth:30, population:150, rowSpacing:300);
                1983-10-15  [Fertiliser].Apply(Amount: 90, Type: Fertiliser.Types.NO3N);
                1983-10-15  [Wheat].Sow(cultivar:Stephens, depth:30, population:150, rowSpacing:300);
                1985-10-15  [Fertiliser].Apply(Amount: 90, Type: Fertiliser.Types.NO3N);
                1985-10-15  [Wheat].Sow(cultivar:Stephens, depth:30, population:150, rowSpacing:300);
                1987-10-15  [Fertiliser].Apply(Amount: 90, Type: Fertiliser.Types.NO3N);
                1987-10-15  [Wheat].Sow(cultivar:Stephens, depth:30, population:150, rowSpacing:300);
                1989-10-15  [Fertiliser].Apply(Amount: 90, Type: Fertiliser.Types.NO3N);
                1989-10-15  [Wheat].Sow(cultivar:Stephens, depth:30, population:150, rowSpacing:300);
                1991-10-15  [Fertiliser].Apply(Amount: 90, Type: Fertiliser.Types.NO3N);
                1991-10-15  [Wheat].Sow(cultivar:Stephens, depth:30, population:150, rowSpacing:300);
                1993-10-15  [Fertiliser].Apply(Amount: 90, Type: Fertiliser.Types.NO3N);
                1993-10-15  [Wheat].Sow(cultivar:Stephens, depth:30, population:150, rowSpacing:300);
                1995-10-15  [Fertiliser].Apply(Amount: 90, Type: Fertiliser.Types.NO3N);
                1995-10-15  [Wheat].Sow(cultivar:Stephens, depth:30, population:150, rowSpacing:300);
                1997-10-15  [Fertiliser].Apply(Amount: 90, Type: Fertiliser.Types.NO3N);
                1997-10-15  [Wheat].Sow(cultivar:Stephens, depth:30, population:150, rowSpacing:300);
                1999-10-15  [Fertiliser].Apply(Amount: 90, Type: Fertiliser.Types.NO3N);
                1999-10-15  [Wheat].Sow(cultivar:Stephens, depth:30, population:150, rowSpacing:300);
              Operations 9_nBPv
                1931-04-15  [SurfaceOrganicMatter].Add(mass: 2000, N: 46, P:0.0, type: "wheat", name: "");
                1931-10-15  [Wheat].Sow(cultivar:Rex, depth:30, population:100, rowSpacing:300);
                1933-04-15  [SurfaceOrganicMatter].Add(mass: 2000, N: 46, P:0.0, type: "wheat", name: "");
                1933-10-15  [Wheat].Sow(cultivar:Rex, depth:30, population:100, rowSpacing:300);
                1935-04-15  [SurfaceOrganicMatter].Add(mass: 2000, N: 46, P:0.0, type: "wheat", name: "");
                1935-10-15  [Wheat].Sow(cultivar:Rex, depth:30, population:100, rowSpacing:300);
                1937-04-15  [SurfaceOrganicMatter].Add(mass: 2000, N: 46, P:0.0, type: "wheat", name: "");
                1937-10-15  [Wheat].Sow(cultivar:Rex, depth:30, population:100, rowSpacing:300);
                1939-04-15  [SurfaceOrganicMatter].Add(mass: 2000, N: 46, P:0.0, type: "wheat", name: "");
                1939-10-15  [Wheat].Sow(cultivar:Rex, depth:30, population:100, rowSpacing:300);
                1941-04-15  [SurfaceOrganicMatter].Add(mass: 2000, N: 46, P:0.0, type: "wheat", name: "");
                1941-10-15  [Wheat].Sow(cultivar:Rex, depth:30, population:100, rowSpacing:300);
                1943-04-15  [SurfaceOrganicMatter].Add(mass: 2000, N: 46, P:0.0, type: "wheat", name: "");
                1943-10-15  [Wheat].Sow(cultivar:Rex, depth:30, population:100, rowSpacing:300);
                1945-04-15  [SurfaceOrganicMatter].Add(mass: 2000, N: 46, P:0.0, type: "wheat", name: "");
                1945-10-15  [Wheat].Sow(cultivar:Rex, depth:30, population:100, rowSpacing:300);
                1947-04-15  [SurfaceOrganicMatter].Add(mass: 2000, N: 46, P:0.0, type: "wheat", name: "");
                1947-10-15  [Wheat].Sow(cultivar:Rex, depth:30, population:100, rowSpacing:300);
                1949-04-15  [SurfaceOrganicMatter].Add(mass: 2000, N: 46, P:0.0, type: "wheat", name: "");
                1949-10-15  [Wheat].Sow(cultivar:Rex, depth:30, population:100, rowSpacing:300);
                1951-04-15  [SurfaceOrganicMatter].Add(mass: 2000, N: 46, P:0.0, type: "wheat", name: "");
                1951-10-15  [Wheat].Sow(cultivar:Rex, depth:30, population:100, rowSpacing:300);
                1953-04-15  [SurfaceOrganicMatter].Add(mass: 2000, N: 34, P:0.0, type: "wheat", name: "");
                1953-10-15  [Wheat].Sow(cultivar:Rex, depth:30, population:100, rowSpacing:300);
                1955-04-15  [SurfaceOrganicMatter].Add(mass: 2000, N: 34, P:0.0, type: "wheat", name: "");
                1955-10-15  [Wheat].Sow(cultivar:Rex, depth:30, population:100, rowSpacing:300);
                1957-04-15  [SurfaceOrganicMatter].Add(mass: 2000, N: 34, P:0.0, type: "wheat", name: "");
                1957-10-15  [Wheat].Sow(cultivar:Rex, depth:30, population:100, rowSpacing:300);
                1959-04-15  [SurfaceOrganicMatter].Add(mass: 2000, N: 34, P:0.0, type: "wheat", name: "");
                1959-10-15  [Wheat].Sow(cultivar:Rex, depth:30, population:100, rowSpacing:300);
                1961-04-15  [SurfaceOrganicMatter].Add(mass: 2000, N: 34, P:0.0, type: "wheat", name: "");
                1961-10-15  [Wheat].Sow(cultivar:Rex, depth:30, population:100, rowSpacing:300);
                1963-04-15  [SurfaceOrganicMatter].Add(mass: 2000, N: 34, P:0.0, type: "wheat", name: "");
                1963-10-15  [Wheat].Sow(cultivar:Rex, depth:30, population:100, rowSpacing:300);
                1965-04-15  [SurfaceOrganicMatter].Add(mass: 2000, N: 34, P:0.0, type: "wheat", name: "");
                1965-10-15  [Wheat].Sow(cultivar:Stephens, depth:30, population:150, rowSpacing:300);
                1967-04-15  [SurfaceOrganicMatter].Add(mass: 2000, N: 34, P:0.0, type: "wheat", name: "");
                1967-10-15  [Wheat].Sow(cultivar:Stephens, depth:30, population:150, rowSpacing:300);
                1969-04-15  [SurfaceOrganicMatter].Add(mass: 2000, N: 34, P:0.0, type: "wheat", name: "");
                1969-10-15  [Wheat].Sow(cultivar:Stephens, depth:30, population:150, rowSpacing:300);
                1971-04-15  [SurfaceOrganicMatter].Add(mass: 2000, N: 34, P:0.0, type: "wheat", name: "");
                1971-10-15  [Wheat].Sow(cultivar:Stephens, depth:30, population:150, rowSpacing:300);
                1973-04-15  [SurfaceOrganicMatter].Add(mass: 2000, N: 34, P:0.0, type: "wheat", name: "");
                1973-10-15  [Wheat].Sow(cultivar:Stephens, depth:30, population:150, rowSpacing:300);
                1975-04-15  [SurfaceOrganicMatter].Add(mass: 2000, N: 34, P:0.0, type: "wheat", name: "");
                1975-10-15  [Wheat].Sow(cultivar:Stephens, depth:30, population:150, rowSpacing:300);
                1977-04-15  [SurfaceOrganicMatter].Add(mass: 2000, N: 34, P:0.0, type: "wheat", name: "");
                1977-10-15  [Wheat].Sow(cultivar:Stephens, depth:30, population:150, rowSpacing:300);
                1979-04-15  [SurfaceOrganicMatter].Add(mass: 2000, N: 34, P:0.0, type: "wheat", name: "");
                1979-10-15  [Wheat].Sow(cultivar:Stephens, depth:30, population:150, rowSpacing:300);
                1981-04-15  [SurfaceOrganicMatter].Add(mass: 2000, N: 34, P:0.0, type: "wheat", name: "");
                1981-10-15  [Wheat].Sow(cultivar:Stephens, depth:30, population:150, rowSpacing:300);
                1983-04-15  [SurfaceOrganicMatter].Add(mass: 2000, N: 34, P:0.0, type: "wheat", name: "");
                1983-10-15  [Wheat].Sow(cultivar:Stephens, depth:30, population:150, rowSpacing:300);
                1985-04-15  [SurfaceOrganicMatter].Add(mass: 2000, N: 34, P:0.0, type: "wheat", name: "");
                1985-10-15  [Wheat].Sow(cultivar:Stephens, depth:30, population:150, rowSpacing:300);
                1987-04-15  [SurfaceOrganicMatter].Add(mass: 2000, N: 34, P:0.0, type: "wheat", name: "");
                1987-10-15  [Wheat].Sow(cultivar:Stephens, depth:30, population:150, rowSpacing:300);
                1989-04-15  [SurfaceOrganicMatter].Add(mass: 2000, N: 34, P:0.0, type: "wheat", name: "");
                1989-10-15  [Wheat].Sow(cultivar:Stephens, depth:30, population:150, rowSpacing:300);
                1991-04-15  [SurfaceOrganicMatter].Add(mass: 2000, N: 34, P:0.0, type: "wheat", name: "");
                1991-10-15  [Wheat].Sow(cultivar:Stephens, depth:30, population:150, rowSpacing:300);
                1993-04-15  [SurfaceOrganicMatter].Add(mass: 2000, N: 34, P:0.0, type: "wheat", name: "");
                1993-10-15  [Wheat].Sow(cultivar:Stephens, depth:30, population:150, rowSpacing:300);
                1995-04-15  [SurfaceOrganicMatter].Add(mass: 2000, N: 34, P:0.0, type: "wheat", name: "");
                1995-10-15  [Wheat].Sow(cultivar:Stephens, depth:30, population:150, rowSpacing:300);
                1997-04-15  [SurfaceOrganicMatter].Add(mass: 2000, N: 34, P:0.0, type: "wheat", name: "");
                1997-10-15  [Wheat].Sow(cultivar:Stephens, depth:30, population:150, rowSpacing:300);
                1999-04-15  [SurfaceOrganicMatter].Add(mass: 2000, N: 34, P:0.0, type: "wheat", name: "");
                1999-10-15  [Wheat].Sow(cultivar:Stephens, depth:30, population:150, rowSpacing:300);
              Operations 8_nBMn
                1931-04-15  [SurfaceOrganicMatter].Add(mass: 11379, N: 111, P:0.0, type: "wheat", name: "");
                1931-10-15  [Wheat].Sow(cultivar:Rex, depth:30, population:100, rowSpacing:300);
                1933-04-15  [SurfaceOrganicMatter].Add(mass: 11379, N: 111, P:0.0, type: "wheat", name: "");
                1933-10-15  [Wheat].Sow(cultivar:Rex, depth:30, population:100, rowSpacing:300);
                1935-04-15  [SurfaceOrganicMatter].Add(mass: 11379, N: 111, P:0.0, type: "wheat", name: "");
                1935-10-15  [Wheat].Sow(cultivar:Rex, depth:30, population:100, rowSpacing:300);
                1937-04-15  [SurfaceOrganicMatter].Add(mass: 11379, N: 111, P:0.0, type: "wheat", name: "");
                1937-10-15  [Wheat].Sow(cultivar:Rex, depth:30, population:100, rowSpacing:300);
                1939-04-15  [SurfaceOrganicMatter].Add(mass: 11379, N: 111, P:0.0, type: "wheat", name: "");
                1939-10-15  [Wheat].Sow(cultivar:Rex, depth:30, population:100, rowSpacing:300);
                1941-04-15  [SurfaceOrganicMatter].Add(mass: 11379, N: 111, P:0.0, type: "wheat", name: "");
                1941-10-15  [Wheat].Sow(cultivar:Rex, depth:30, population:100, rowSpacing:300);
                1943-10-15  [Wheat].Sow(cultivar:Rex, depth:30, population:100, rowSpacing:300);
                1945-10-15  [Wheat].Sow(cultivar:Rex, depth:30, population:100, rowSpacing:300);
                1947-10-15  [Wheat].Sow(cultivar:Rex, depth:30, population:100, rowSpacing:300);
                1949-04-15  [SurfaceOrganicMatter].Add(mass: 11379, N: 56, P:0.0, type: "wheat", name: "");
                1949-10-15  [Wheat].Sow(cultivar:Rex, depth:30, population:100, rowSpacing:300);
                1951-04-15  [SurfaceOrganicMatter].Add(mass: 11379, N: 56, P:0.0, type: "wheat", name: "");
                1951-10-15  [Wheat].Sow(cultivar:Rex, depth:30, population:100, rowSpacing:300);
                1953-04-15  [SurfaceOrganicMatter].Add(mass: 11379, N: 111, P:0.0, type: "wheat", name: "");
                1953-10-15  [Wheat].Sow(cultivar:Rex, depth:30, population:100, rowSpacing:300);
                1955-04-15  [SurfaceOrganicMatter].Add(mass: 11379, N: 111, P:0.0, type: "wheat", name: "");
                1955-10-15  [Wheat].Sow(cultivar:Rex, depth:30, population:100, rowSpacing:300);
                1957-04-15  [SurfaceOrganicMatter].Add(mass: 11379, N: 111, P:0.0, type: "wheat", name: "");
                1957-10-15  [Wheat].Sow(cultivar:Rex, depth:30, population:100, rowSpacing:300);
                1959-04-15  [SurfaceOrganicMatter].Add(mass: 11379, N: 111, P:0.0, type: "wheat", name: "");
                1959-10-15  [Wheat].Sow(cultivar:Rex, depth:30, population:100, rowSpacing:300);
                1961-04-15  [SurfaceOrganicMatter].Add(mass: 11379, N: 111, P:0.0, type: "wheat", name: "");
                1961-10-15  [Wheat].Sow(cultivar:Rex, depth:30, population:100, rowSpacing:300);
                1963-04-15  [SurfaceOrganicMatter].Add(mass: 11379, N: 111, P:0.0, type: "wheat", name: "");
                1963-10-15  [Wheat].Sow(cultivar:Rex, depth:30, population:100, rowSpacing:300);
                1965-04-15  [SurfaceOrganicMatter].Add(mass: 11379, N: 111, P:0.0, type: "wheat", name: "");
                1965-10-15  [Wheat].Sow(cultivar:Stephens, depth:30, population:150, rowSpacing:300);
                1967-04-15  [SurfaceOrganicMatter].Add(mass: 11379, N: 111, P:0.0, type: "wheat", name: "");
                1967-10-15  [Wheat].Sow(cultivar:Stephens, depth:30, population:150, rowSpacing:300);
                1969-04-15  [SurfaceOrganicMatter].Add(mass: 11379, N: 111, P:0.0, type: "wheat", name: "");
                1969-10-15  [Wheat].Sow(cultivar:Stephens, depth:30, population:150, rowSpacing:300);
                1971-04-15  [SurfaceOrganicMatter].Add(mass: 11379, N: 111, P:0.0, type: "wheat", name: "");
                1971-10-15  [Wheat].Sow(cultivar:Stephens, depth:30, population:150, rowSpacing:300);
                1973-04-15  [SurfaceOrganicMatter].Add(mass: 11379, N: 111, P:0.0, type: "wheat", name: "");
                1973-10-15  [Wheat].Sow(cultivar:Stephens, depth:30, population:150, rowSpacing:300);
                1975-04-15  [SurfaceOrganicMatter].Add(mass: 11379, N: 111, P:0.0, type: "wheat", name: "");
                1975-10-15  [Wheat].Sow(cultivar:Stephens, depth:30, population:150, rowSpacing:300);
                1977-04-15  [SurfaceOrganicMatter].Add(mass: 11379, N: 111, P:0.0, type: "wheat", name: "");
                1977-10-15  [Wheat].Sow(cultivar:Stephens, depth:30, population:150, rowSpacing:300);
                1979-04-15  [SurfaceOrganicMatter].Add(mass: 11379, N: 111, P:0.0, type: "wheat", name: "");
                1979-10-15  [Wheat].Sow(cultivar:Stephens, depth:30, population:150, rowSpacing:300);
                1981-04-15  [SurfaceOrganicMatter].Add(mass: 11379, N: 111, P:0.0, type: "wheat", name: "");
                1981-10-15  [Wheat].Sow(cultivar:Stephens, depth:30, population:150, rowSpacing:300);
                1983-04-15  [SurfaceOrganicMatter].Add(mass: 11379, N: 111, P:0.0, type: "wheat", name: "");
                1983-10-15  [Wheat].Sow(cultivar:Stephens, depth:30, population:150, rowSpacing:300);
                1985-04-15  [SurfaceOrganicMatter].Add(mass: 11379, N: 111, P:0.0, type: "wheat", name: "");
                1985-10-15  [Wheat].Sow(cultivar:Stephens, depth:30, population:150, rowSpacing:300);
                1987-04-15  [SurfaceOrganicMatter].Add(mass: 11379, N: 111, P:0.0, type: "wheat", name: "");
                1987-10-15  [Wheat].Sow(cultivar:Stephens, depth:30, population:150, rowSpacing:300);
                1989-04-15  [SurfaceOrganicMatter].Add(mass: 11379, N: 111, P:0.0, type: "wheat", name: "");
                1989-10-15  [Wheat].Sow(cultivar:Stephens, depth:30, population:150, rowSpacing:300);
                1991-04-15  [SurfaceOrganicMatter].Add(mass: 11379, N: 111, P:0.0, type: "wheat", name: "");
                1991-10-15  [Wheat].Sow(cultivar:Stephens, depth:30, population:150, rowSpacing:300);
                1993-04-15  [SurfaceOrganicMatter].Add(mass: 11379, N: 111, P:0.0, type: "wheat", name: "");
                1993-10-15  [Wheat].Sow(cultivar:Stephens, depth:30, population:150, rowSpacing:300);
                1995-04-15  [SurfaceOrganicMatter].Add(mass: 11379, N: 111, P:0.0, type: "wheat", name: "");
                1995-10-15  [Wheat].Sow(cultivar:Stephens, depth:30, population:150, rowSpacing:300);
                1997-04-15  [SurfaceOrganicMatter].Add(mass: 11379, N: 111, P:0.0, type: "wheat", name: "");
                1997-10-15  [Wheat].Sow(cultivar:Stephens, depth:30, population:150, rowSpacing:300);
                1999-04-15  [SurfaceOrganicMatter].Add(mass: 11379, N: 111, P:0.0, type: "wheat", name: "");
                1999-10-15  [Wheat].Sow(cultivar:Stephens, depth:30, population:150, rowSpacing:300);
          Simulation PendletonBaseSimulation
            Weather: FileName=pendletonAPSIMtav.met
            Clock: StartDate=1930-01-01; EndDate=1990-12-31
            Summary summaryfile
            Zone Field: Area=1; Slope=0
              Operations: same as Validation.North America.Pendleton.Pendleton.Factors.Treatment.0_nBN0
              Manager TillageOperations
                TillDate = 16-may
                IncorpFraction = 0.95
```csharp
using System;
using Models.Core;
using Models.PMF;
using Models.Soils;
using Models.Soils.Nutrients;
using Models.Soils.Nutrients;
using Models.Utilities;
using APSIM.Shared.Utilities;
using Models.Surface;

namespace Models
{
    [Serializable] 
    public class Script : Model
    {
        [Description("Crop")]
        [Link] Plant Wheat;
        [Description("Tillage date (d-mmm)")]
        public string TillDate { get; set; }
        [Description("Incorporation fraction (0-1)")]
        public double IncorpFraction { get; set; }

        [Link] Clock Clock;
        [Link] SurfaceOrganicMatter SOM;
        
        [EventSubscribe("DoManagement")]
        private void OnDoManagement(object sender, EventArgs e)
        {
            if ((!Wheat.IsAlive) && DateUtilities.WithinDates(TillDate, Clock.Today, TillDate))
                SOM.Incorporate(fraction: IncorpFraction, depth: 200);            
        }
    }
}
```
              Operations NOperations
              Report HarvestReport: EventNames=[Wheat].Harvesting
                VariableNames:
                  [Clock].Today
                  [Clock].Today.Year
                  [Wheat].Grain.Wt
                  [Wheat].Grain.N*10 as NExport
                  [Wheat].AboveGround.Wt
                  sum([Soil].Nutrient.TotalC[1:2]) as TOC0_30cm
                  [Soil].Nutrient.TotalC[3] as TOC30_60cm
                  sum([Soil].Nutrient.TotalN[1:2]) as TON0_30cm
                  [Soil].Nutrient.TotalN[3] as TON30_60cm
                  sum([Soil].Nutrient.TotalC[1:2])/sum([Soil].Nutrient.TotalN[1:2]) as CNR0_30cm
                  [Soil].Nutrient.TotalC[3]/[Soil].Nutrient.TotalN[3] as CNR30_60cm
              Report: EventNames=[Clock].EndOfMonth
                VariableNames:
                  [Clock].Today
                  [Soil].Nutrient.TotalC[1] as TOC0_10cm
                  [Soil].Nutrient.TotalC[2] as TOC10_30cm
                  [Soil].Nutrient.TotalC[3] as TOC30_60cm
                  ([Soil].Nutrient.TotalC[1]+[Soil].Nutrient.TotalC[2]) as TOC0_30cm
                  [Soil].Nutrient.TotalN[1] as TON0_10cm
                  [Soil].Nutrient.TotalN[2] as TON10_30cm
                  [Soil].Nutrient.TotalN[3] as TON30_60cm
                  ([Soil].Nutrient.TotalN[1]+[Soil].Nutrient.TotalN[2]) as TON0_30cm
              SurfaceOrganicMatter stubble: InitialResidueName=wheat; InitialResidueType=wheat; InitialResidueMass=1000; InitialStandingFraction=0; InitialCPR=0; InitialCNR=80; FractionFaecesAdded=0.5
              Plant wheat: same as Validation.Australia.Tarlee.Tarlee.TarleeBaseSimulation.Field.wheat
              MicroClimate: a_interception=0; b_interception=1; c_interception=0; d_interception=0; soil_albedo=0.23; SoilHeatFluxFraction=0.4; NightInterceptionFraction=0.5; ReferenceHeight=2
              Manager Harvesting
                script: same as in Validation.Australia.Tarlee.Tarlee.TarleeBaseSimulation.Field.Harvesting
              Fertiliser
              Soil: ASCOrder=Sodosol; ASCSubOrder=Red; SoilType=Sandy loam; Site=Tarlee; NearestTown=Tarlee; Region=Mid North; State=South Australia; Country=Australia; ApsoilNumber=610; Latitude=-34.276; Longitude=138.759; LocationAccuracy=+/- 20m
                DataSource=Characterisation 2008 by University of Adelaide, CSIRO Sustainable Ecosystems and Allan Mayfield Consulting, Clare, SA
                Comments=Roots: Wheat 90cm; barley and oats estimated; OC WB as measured; Strongly duplex low-moderate clay soil. Surface CEC low, moderate below. Texture change at about 7cm. Little chemical impediment to root growth, but high ESP below about 60cm may result in slaking or dispersion and high bulk density.
                Water
                  Thickness  BD    AirDry  LL15  DUL   SAT   KS
                  150        1.24  0.055   0.11  0.32  0.52  562
                  150        1.25  0.055   0.11  0.32  0.52  562
                  300        1.26  0.09    0.11  0.31  0.51  557
                  300        1.29  0.1     0.1   0.31  0.5   959
                  300        1.3   0.1     0.1   0.3   0.49  1063
                  300        1.3   0.1     0.1   0.3   0.49  1063
                  300        1.3   0.1     0.1   0.3   0.49  1063
                  SoilCrop WheatSoil: LL=[0.11, 0.11, 0.11, 0.1, 0.1, 0.1, 0.1]; KL=[0.06, 0.06, 0.05, 0.04, 0.04, 0.02, 0.01]; XF=[1, 1, 1, 1, 1, 0, 0]
                SoilWater: SummerDate=1-Apr; SummerU=6; SummerCona=3.5; WinterDate=1-Nov; WinterU=2; WinterCona=2; DiffusConst=88; DiffusSlope=35; Salb=0.13; CN2Bare=73; CNRed=20; CNCov=0.8; max_pond=0; Thickness=[100, 200, 300, 300, 900]; SWCON=[0.5, 0.5, 0.5, 0.5, 0.5]; ResidueInterception=0
                Nutrient: same as Validation.Australia.Tarlee.Tarlee.TarleeBaseSimulation.Field.Soil.Nutrient
                SoilOrganicMatter: RootCN=57; SoilCN=13; EnrACoeff=7.4; EnrBCoeff=0.2; OCUnits=Total
                  Thickness  OC     FBiom  FInert  RootWt
                  150        1.42   0.04   0.35    385
                  150        1.2    0.03   0.5     300
                  300        0.95   0.02   0.65    182
                  300        0.5    0.02   0.75    110
                  300        0.225  0.015  0.85    67
                  300        0.15   0.01   0.99    40
                  300        0.15   0.01   0.99    25
                Analysis: Thickness=[150, 150, 300, 300, 300, 300, 300]; PH=[6.64, 6.64, 6.64, 6.64, 6.64, 6.64, 6.64]; PHUnits=Water; BoronUnits=0
                InitialWater Initial water: PercentMethod=0; FractionFull=1
                Sample Initial conditions: NO3Units=kg/ha; NH4Units=ppm; SWUnits=Volumetric; OCUnits=Total; PHUnits=Water
                  Thickness  NO3   NH4
                  100        10.2  0.0355556
                  200        19.9  0
                  300        19    0
                  300        15.5  0
                  300        21.1  0
                  300        17.7  0
                  300        17.7  0
                CERESSoilTemperature
              SoluteManager
            SoilArbitrator
            MicroClimate: a_interception=0; b_interception=1; c_interception=0; d_interception=0; soil_albedo=0.23; SoilHeatFluxFraction=0.4; NightInterceptionFraction=0.5; ReferenceHeight=2
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