Simulations: Version=27
  Memo TitlePage
    # The APSIM Oats Model

    _Allan Peake, Hamish Brown, Rob Zyskowski, Edmar I. Teixeira, Neil Huth_
  Memo Introduction
    The APSIM oats model has been developed using the Plant Modelling Framework (PMF) of [brown_plant_2014]. This new framework provides a library of plant organ and process submodels that can be coupled, at runtime, to construct a model in much the same way that models can be coupled to construct a simulation. This means that dynamic composition of lower level process and organ classes (e.g. photosynthesis, leaf) into larger constructions (e.g. maize, wheat, sorghum) can be achieved by the model developer without additional coding.

    The wheat model consists of:

    * a phenology model to simulate development through sequential growth phases
    * a structure model to simulate plant morphology
    * a collection of organs to simulate the various plant parts
    * an arbitrator to allocate resources (N, biomass) to the various plant organs

    This work builds upon earlier APSIM Wheat models such as NWheat ([Asseng200225], [KeatingNWheat]), NWheatS ([Asseng1998163]), Cropmod-Wheat ([Wang2002GenericCropModel]) , and the earlier versions developed within the Plant Modelling Framework ([brown_plant_2014]).
  Replacements
    Report DailyReport: EventNames=[Clock].DoReport
      VariableNames:
        [Clock].Today
        [Oats].Phenology.CurrentStageName
        [Weather].MeanT
        [Soil].SoilWater.SW
        [Soil].SoilWater.SWmm
        sum([Soil].SoilWater.SWmm) as ProfileWater
        [Oats].AboveGround.N
        [Oats].AboveGround.Wt
        [Oats].AboveGroundLive.N
        [Oats].AboveGroundLive.N*10 as UptakeNKgHA
        [Oats].AboveGroundLive.Wt
        [Oats].AboveGroundDead.N
        [Oats].AboveGroundDead.Wt
        [Oats].Arbitrator.DMDemand
        [Oats].Arbitrator.DM.TotalFixationSupply
        [Oats].Ear.N
        [Oats].Ear.Nconc
        [Oats].Ear.Wt
        [Oats].Grain.N
        [Oats].Grain.NConc
        [Oats].Grain.Number
        [Oats].Grain.Size
        [Oats].Grain.Wt
        [Oats].Grain.Live.Wt
        [Oats].Leaf.AppearedCohortNo
        [Oats].Leaf.CoverDead
        [Oats].Leaf.CoverGreen
        [Oats].Leaf.CoverTotal
        [Oats].Leaf.Dead.N
        [Oats].Leaf.Dead.NConc
        [Oats].Leaf.Dead.Wt
        [Oats].Leaf.DeadCohortNo
        [Oats].Leaf.GreenCohortNo
        [Oats].Leaf.SenescingCohortNo
        [Oats].Leaf.ExpandedCohortNo
        [Oats].Leaf.Fn
        [Oats].Leaf.Fw
        [Oats].Leaf.Height
        [Oats].Leaf.InitialisedCohortNo
        [Oats].Leaf.LAI
        [Oats].Leaf.Live.N
        [Oats].Leaf.Live.NConc
        [Oats].Leaf.Live.Wt
        [Oats].Leaf.SpecificArea
        [Oats].Leaf.Transpiration
        [Oats].Phenology.CurrentPhaseName
        [Oats].Phenology.CurrentStageName
        [Oats].Phenology.DailyVernalisation.Value()
        [Oats].Phenology.MeanTemp.Value()
        [Oats].Phenology.Photoperiod.Value()
        [Oats].Phenology.Stage
        [Oats].Phenology.ThermalTime.Value()
        [Oats].Phenology.ThermalTime.Value()
        [Oats].Phenology.Vrn1.Value()
        [Oats].Phenology.Vrn2.Value()
        [Oats].Phenology.Vrn4.Value()
        [Oats].Phenology.Zadok.Stage
        [Oats].Root.Depth
        [Oats].Root.N
        [Oats].Root.Wt
        [Oats].Root.Nconc
        [Oats].Root.WaterUptake
        [Oats].Panicle.N
        [Oats].Panicle.NConc
        [Oats].Panicle.Wt
        [Oats].Panicle.Live.StorageWt
        [Oats].Stem.N
        [Oats].Stem.NConc
        [Oats].Stem.Wt
        [Oats].Stem.PercentWSC
        [Oats].Stem.Live.StorageWt
        [Oats].StemPlusPanicle.Wt
        [Oats].StemPlusPanicle.N
        [Oats].SowingData.Cultivar
        [Oats].Structure.HaunStage.Value()TerminalSpikelet.Value()
        [Oats].Structure.HaunStage.Value()
        [Oats].Structure.Height
        [Oats].Structure.LeafTipsAppeared
        [Oats].Structure.FinalLeafNumber.Value()
        [Oats].Structure.FinalLeafNumber.ValueToHold.PhotoPLeaves.Value()
        [Oats].Structure.MainStemPopn
        [Oats].Structure.MeanTillerGrowthRate.Value()
        [Oats].Structure.TotalStemPopn
        [Oats].Total.N
        [Oats].Total.Wt
        [SurfaceOrganicMatter].Wt
        ([Oats].Leaf.Transpiration + [Soil].SoilWater.Es + [MicroClimate].interception) as ET
        sum([Soil].SoilNitrogen.NO3) as TotalSoilNitrogen
        [Oats].Phenology.FlagLeafDAS
        [Oats].Phenology.FloweringDAS
        [Oats].Phenology.MaturityDAS
        [Oats].Phenology.PhotoPeriod
        [Oats].Phenology.PhotoPeriodDeltaFunction
        [Oats].Phenology.Stage
        [Oats].Phenology.SoilTemperatureFunction.Value()
        [Clock].Today.Year
    Report HarvestReport: EventNames=[Oats].Harvesting
      VariableNames:
        [Oats].Structure.LeafTipsAppeared
        [Oats].Structure.FinalLeafNumber
        [Oats].Phenology.FlagLeafDAS
        [Oats].Phenology.FloweringDAS
        [Oats].Phenology.MaturityDAS
        [Oats].Phenology.CurrentPhaseName
        [Oats].Phenology.CurrentStageName
        [Oats].AboveGroundLive.Wt
        [Oats].AboveGroundLive.Wt
        [Oats].Grain.Wt
    Plant Oats: CropType=Wheat
      Memo TitlePage
        # The APSIM Wheat Model

        _Brown, H.E., Huth, N.I. and Holzworth, D.P._

        The APSIM wheat model has been developed using the Plant Modelling Framework (PMF) of [brown_plant_2014]. This new framework provides a library of plant organ and process submodels that can be coupled, at runtime, to construct a model in much the same way that models can be coupled to construct a simulation. This means that dynamic composition of lower level process and organ classes (e.g. photosynthesis, leaf) into larger constructions (e.g. maize, wheat, sorghum) can be achieved by the model developer without additional coding.

        The model consists of:

        * a phenology model to simulate development between developmental phases
        * a structure model to simulate plant morphology
        * a collection of organs to simulate the various plant parts
        * an arbitrator to allocate resources (N, biomass) to the various plant organs
      OrganArbitrator Arbitrator
        RelativeAllocation NArbitrator
        RelativeAllocation DMArbitrator
      Phenology: DaysAfterSowing=0
        Memo
          Wheat exhibits a range of developmental responses to environment and these are strongly influences by genotype characteristics.
          Temperature effects development increasing development rates and decreasing phase durations as temperatures increase.  Theset affects are captured by thermal time, .  However, wheat also exhibits vernalisation and photoperiod sensitivities in its Vegetative phase and further photoperiod sensitivity in the EarlyReproducivePhase.  Photoperiod responses are seen as a reduction in the length of a phase for a photoperiod sensitive genotype in response to a longer photoperiod.  Vernalisation responses are more complicated as they are driven by temperature but interact with photoperiod.  For vernalisation sensitive varieties (Winter types) exposure to cool temperatures or short photoperiods during the Vegetative phase will reduce the thermal time duration of the vegetative phase.

          We draw on the Kirby Framework to capture these vernalisation and photoperiod responses.  This framework assumes that the timing of anthesis is a result of the timing of flag leaf and an additional thermal time passage from there to anthesis.  It also assumes the timing of flag leaf is a result of the Final Leaf Number which sets a target, and leaf appearance rate, which sets the rate of progress toward this target.  Leaf appearance rate is a function of Thermal time and a genotype specific Phyllochron which changes with Haun stage as described by [Jamieson_LeafAppearance_1995].

          Final Leaf Number (FLN) is modeled as the sum of three numbers:

          FLN = MinLeafNumber + VernalLeaves + PhotoLeaves

          Where MinLeafNumber is the number of leaves that a wheat crop will produce when vernalisation is satisified early in the crops duration (before 2nd true leaf) and it is grown in a long photoperiod..  VernalLeaves are the number of leaves that are added due to vernalisation effects.  For insensitive varieties this will always be zero but this is potentially a larger number for sensitivie varieties and the number progresively decreases as the crop encounters more vernalisation.  PhotoLeaves are the number of leaves that are added to the minimum leaf number as a result of short day exposure.  For insensitive varieties this will be zero but is potential larger for more sensitivie varieties and decreases as day length increases.  More detailed explinations of the components of phenology are provided below.
        DivideFunction MeanTemp
          AddFunction TempSum
            VariableReference MaxT: VariableName=[Weather].MaxT
            VariableReference MinT: VariableName=[Weather].MinT
          Constant Two: FixedValue=2
        AirTemperatureFunction ThermalTime
          XYPairs: X=[0, 30, 40]; Y=[0, 30, 0]
          Memo
            Thermal time determines the rate of developmental progress through many of the crops phases and is used by organs to determing potential growth rates.
        MultiplyFunction DailyVernalisation
          Memo
            Vernalisation responses are based on those described by [Brown_Anthesis_2013].   Vernalisation is assumed to be related to the expression of the Vrn1 Gene.  Its experssion is accumulated daily and daily upregulation as a function of development (DeltaHaunStage) and a TempResponseProfile that declines exponentially from a maximum at 1<sup>o</sup>C to zero at 0<sup>o</sup>C and at 18<sup>o</sup>C.
          VariableReference DeltaHaunStage: VariableName=[Structure].DeltaHaunStage
          AirTemperatureFunction TempResponseProfile
            XYPairs
              X=[0, 1, 2, 3, 4, 5, 6, 7, 8, 9, 10, 11, 12, 13, 14, 15, 16, 17, 18, 19, 20, 30, 32]
              Y=[0, 1.205, 1.037, 0.893, 0.768, 0.661, 0.569, 0.49, 0.422, 0.363, 0.312, 0.269, 0.231, 0.199, 0.171, 0.148, 0.127, 0.109, 0.094, 0.081, 0, 0, -0.5]
        PhotoperiodFunction Photoperiod: Twilight=-6; DayLength=0
        PhaseLookup PerceivedPhotoPeriod
          PhaseLookupValue ApexBelowGround: Start=Germination; End=Emergence
            Constant Photoperiod: FixedValue=0; Units=h
          PhaseLookupValue ApexAboveGround: Start=Emergence; End=HarvestRipe
            VariableReference Photoperiod: VariableName=[Phenology].Photoperiod.Value()
        MinimumFunction Vrn1
          Memo
            Vrn1 accumulation begins when Vrn4 experssion is down regulated to zero and stops, assuming vernalisation saturation, at a value of 1
          Constant Saturation: FixedValue=1; Units=Relative Experssion
          AccumulateFunction CurrentExpression: StartStageName=Germination; EndStageName=TerminalSpikelet; FractionRemovedOnCut=0; FractionRemovedOnHarvest=0; FractionRemovedOnGraze=0; FractionRemovedOnPrune=0
            LessThanFunction Vernalisation
              VariableReference If_Vrn4: VariableName=[Phenology].Vrn4.Value()
              VariableReference IsLessThanLag: VariableName=[Phenology].VernLag.Value()
              Constant Return_Zero: FixedValue=0
              VariableReference elseReturn_Vernalisation: VariableName=[Phenology].DailyVernalisation.Value()
        MinimumFunction Vrn4
          VariableReference MaxExpression: VariableName=[Phenology].VernLag.Value()
          AccumulateFunction CurrentExpression: StartStageName=Germination; EndStageName=TerminalSpikelet; FractionRemovedOnCut=0; FractionRemovedOnHarvest=0; FractionRemovedOnGraze=0; FractionRemovedOnPrune=0
            VariableReference VernalisationConditioning: VariableName=[Phenology].DailyVernalisation.Value()
        Constant MinimumLeafNumber: FixedValue=7; Units=Leaves
          Memo
            Number of leaves the plant will produce when fully vernalised early and grown in long photoperiod
        Constant VrnSensitivity: FixedValue=0; Units=Leaves
          Memo
            The difference between Inherent earlyness leaf number and the number of leaves produced when the plant is unvernalised and grown in long photoperiod
        Constant VernLag: FixedValue=1; Units=Unitless
          Memo
            The amount of vernalising temperature required before vernalisation response will be evident.  Value of relative to the amount offl vernalisation temperature required from the end of the lag until vernalisation saturation.  A value of 0 means there is no lag, a value of 1 means the lag is the same (in vernal time) as the vernalisation requirement and a value of 2 means the lag is twice as long as the vernalisation response phase
        Constant PpSensitivity: FixedValue=3; Units=Leaves
          Memo
            The reduction in leaf number going from 8 to 16 h Pp
        Constant EarlyReproductivePpSensitivity: FixedValue=3
          Memo
            The phyllochrons duration for the plant to go from flag leaf ligual appearance at 16 h Pp compared to the phyllochron duration for the same phase at 8 h Pp.
        Constant EarlyReproductiveLongDayBase: FixedValue=3
          Memo
            The phyllochrons duration for the plant to go from flag leaf ligual appearance at 16 h Pp.
        GerminatingPhase Germinating: Start=Sowing; End=Germination
        EmergingPhase Emerging: Start=Germination; End=Emergence; ShootLag=40; ShootRate=4
          VariableReference ThermalTime: VariableName=[Phenology].ThermalTime.Value()
        GenericPhase Vegetative: Start=Emergence; End=TerminalSpikelet
          Memo
            The duration of the vegetative phase is set by a target Haun Stage for the occurence of Terminal Spikelet and the rate of leaf appearance.
          VariableReference ThermalTime: VariableName=[Phenology].ThermalTime.Value()
          MultiplyFunction Target
            VariableReference Phyllochron: VariableName=[Structure].MeanPhyllochron.Value()
            VariableReference HSTS: VariableName=[Structure].HaunStageTerminalSpikelet.Value()
          Memo Memo1
            HaunStageTerminalSpiklet decreases as vernalisation is accumulated and as photoperiod extends, capturing the effect of these responses on the duration of the Vegetative phase
        LeafAppearancePhase StemElongation: Start=TerminalSpikelet; End=FlagLeaf
          Memo
            The Final leaf number is fixed at Terminal Spikelet and leaves contune to appear at a rate set by thermal time and phyllochron until flag leaf liguale appears and this phase is completed.
          VariableReference ThermalTime: VariableName=[Phenology].ThermalTime.Value()
        GenericPhase EarlyReproductive: Start=FlagLeaf; End=Flowering
          VariableReference ThermalTime: VariableName=[Phenology].ThermalTime.Value()
          MultiplyFunction Target
            VariableReference Phyllochron: VariableName=[Structure].Phyllochron.BasePhyllochron.Value()
            AddFunction Phyllochrons
              VariableReference LongDayBase: VariableName=[Phenology].EarlyReproductiveLongDayBase.Value()
              MultiplyFunction IncreaseDueToShortPhotoPeriod
                LinearInterpolationFunction PhotoPeriodResponse: XProperty=[Phenology].Photoperiod.Value()
                  XYPairs: X=[11, 16]; Y=[1, 0]
                VariableReference PpSensitivity: VariableName=[Phenology].EarlyReproductivePpSensitivity.Value()
        GenericPhase GrainDevelopment: Start=Flowering; End=StartGrainFill
          Constant Target: FixedValue=20
          VariableReference ThermalTime: VariableName=[Phenology].ThermalTime.Value()
        GenericPhase GrainFilling: Start=StartGrainFill; End=EndGrainFill
          Constant Target: FixedValue=650
          VariableReference ThermalTime: VariableName=[Phenology].ThermalTime.Value()
        GenericPhase Maturing: Start=EndGrainFill; End=Maturity
          Constant Target: FixedValue=30
          VariableReference ThermalTime: VariableName=[Phenology].ThermalTime.Value()
        GenericPhase Ripening: Start=Maturity; End=HarvestRipe
          Constant Target: FixedValue=100
          VariableReference ThermalTime: VariableName=[Phenology].ThermalTime.Value()
        EndPhase ReadyForHarvesting: Start=HarvestRipe; End=Unused
          VariableReference ThermalTime: VariableName=[Phenology].ThermalTime.Value()
        ZadokPMF Zadok
        OnEventFunction FlagLeafDAS: SetEvent=FlagLeaf; ReSetEvent=never
          Memo
            A function is used to provide flowering date as days after sowing(DAS).
          Constant PreEventValue: FixedValue=0
          VariableReference PostEventValue: VariableName=[Phenology].DaysAfterSowing
        OnEventFunction FloweringDAS: SetEvent=Flowering; ReSetEvent=never
          Memo
            A function is used to provide flowering date as days after sowing(DAS).
          Constant PreEventValue: FixedValue=0
          VariableReference PostEventValue: VariableName=[Phenology].DaysAfterSowing
        OnEventFunction MaturityDAS: SetEvent=Maturity; ReSetEvent=never
          Memo
            A function is used to provide maturity date as days after sowing(DAS).
          Constant PreEventValue: FixedValue=0
          VariableReference PostEventValue: VariableName=[Phenology].DaysAfterSowing
      Structure: Initialised=false; Germinated=false; Emerged=false; CohortToInitialise=0; TipToAppear=0; ApexNum=0
        VariableReference ThermalTime: VariableName=[Phenology].ThermalTime.Value()
        MultiplyFunction Phyllochron
          Memo Rational
            This is the thermal time between the emergence of leaf tips.  The model used here is based on [Jamieson_SIRIUS_1998] where leaf appearace could be described by a base phyllochron determined between leaves 2 and 7 and a phyllochron that was 70% of base phyllochron for leaves < 2 and 130% of base phyllochron for leaves > 7
          LinearInterpolationFunction LeafStageFactor: XProperty=[Leaf].AppearedCohortNo
            XYPairs: X=[0, 2, 3, 6, 8, 11, 12]; Y=[0.75, 0.75, 1, 1, 1.4, 1.4, 1.4]
              Memo
                Changing 4th line from 7:1 to 6:1.
                Leaf appearance rate calibrated using data from Gatton 2007 for Taipan and Coolibah
          Constant BasePhyllochron: FixedValue=90; Units=oC.d
          LinearInterpolationFunction PhotoPeriodEffect: XProperty=[Phenology].Photoperiod.Value()
            XYPairs: X=[8, 12, 14]; Y=[1.6, 1, 1]
        MultiplyFunction BranchingRate
          Memo
            Potential branching rate is determined by the commonly observed pattern of tillering in wheat, in which each tiller emerges with the third leaf on its parent axis (e.g. first tiller emerges at the same time as the third leaf on the main stem, the first secondary tiller appears with the third leaf on tiller 1).  This is described as a simple function of main stem leaf number.
          PhaseLookup PotentialBranchingRate
            PhaseLookupValue Vegetative: Start=Emergence; End=TerminalSpikelet
              LinearInterpolationFunction PotentialBranchingRate: XProperty=[Structure].LeafTipsAppeared
                XYPairs: X=[1, 2, 2.99, 3, 4, 5, 6, 7, 8]; Y=[0, 0, 0, 1, 2, 4, 7, 12, 20]
            PhaseLookupValue Reproductive: Start=TerminalSpikelet; End=HarvestRipe
              Constant Zero: FixedValue=0
          MinimumFunction StressFactors
            LinearInterpolationFunction NitrogenEffect: XProperty=[Arbitrator].FN
              Memo
                Inadequate Nitrogen supply is assumed to affect tillering prior to any effect on photosynthesis or leaf size.
              XYPairs: X=[0.5, 1]; Y=[0, 1]
            LinearInterpolationFunction CoverEffect: XProperty=[Leaf].CoverTotal
              Memo
                Tillering is said to cease once a threshold fraction of incoming radiation has been achieved.  This captures shading effects on tillering described by [evers2006cessation].
              XYPairs: X=[0, 0.1, 0.5]; Y=[1, 1, 0]
            LinearInterpolationFunction WaterStressEffect: XProperty=[Root].WaterTensionFactor
              XYPairs: X=[0, 1]; Y=[0, 1]
        PhaseLookup BranchMortality
          PhaseLookupValue MortalityPhase: Start=TerminalSpikelet; End=Flowering
            MultiplyFunction Mortality
              LinearInterpolationFunction MortalityPerDegDay: XProperty=[Structure].MeanTillerGrowthRate.Value()
                XYPairs: X=[0, 0.005]; Y=[0.002, 0]
              VariableReference ThermalTime: VariableName=[Phenology].ThermalTime.Value()
        HeightFunction HeightModel
          LinearInterpolationFunction PotentialHeight: XProperty=[Phenology].Stage
            XYPairs: X=[3, 3.8, 5, 6]; Y=[20, 300, 1100, 1200]
          LinearInterpolationFunction WaterStress: XProperty=[Oats].WaterSupplyDemandRatio
            XYPairs: X=[0.3, 1]; Y=[0, 1]
          HeightFunction HeightModel
            LinearInterpolationFunction PotentialHeight: XProperty=[Phenology].Stage
              XYPairs: X=[3, 3.8, 5, 6]; Y=[20, 300, 1100, 1200]
            LinearInterpolationFunction WaterStress: same as Replacements.Oats.Structure.HeightModel.WaterStress
        MovingAverageFunction MeanTillerGrowthRate: NumberOfDays=5; StageToStartMovingAverage=Emergence
          Memo
            This is calculated to represent the supply of asslimilate to individual tillers over the past 5 days to use as an index to determine tiller mortality.  When tiller numbers are high or total crop assimilate supply is small there will not be enough assimilate to maintain all of the tillers so the model will senesce some.
          DivideFunction TillerGrowthRate
            VariableReference DailyGrowth: VariableName=[Arbitrator].DM.TotalFixationSupply
            VariableReference ThermalTime: VariableName=[Phenology].ThermalTime.Value()
            VariableReference StemPopulation: VariableName=[Structure].TotalStemPopn
        MovingAverageFunction MeanPhyllochron: NumberOfDays=300; StageToStartMovingAverage=Emergence
          VariableReference Phyllochron: VariableName=[Structure].Phyllochron.Value()
        HoldFunction FinalLeafNumber: WhenToHold=TerminalSpikelet
          AddFunction FinalNodeNumber
            VariableReference MinLeafNumber: VariableName=[Phenology].MinimumLeafNumber.Value()
            MultiplyFunction VernalLeaves
              VariableReference UnVernalisedLeaves: VariableName=[Phenology].VrnSensitivity.Value()
              SubtractFunction VernalisationReductionFactor
                Constant One: FixedValue=1
                VariableReference RelativeVrn1Expression: VariableName=[Phenology].Vrn1.Value()
            MultiplyFunction PhotoPLeaves
              VariableReference ShortPpLeaves: VariableName=[Phenology].PpSensitivity.Value()
              LinearInterpolationFunction PhotoPeriodReductionFactor: XProperty=[Phenology].Photoperiod.Value()
                XYPairs: X=[10, 16]; Y=[1, 0]
        ExpressionFunction HaunStageTerminalSpikelet: Expression=([Structure].FinalLeafNumber.Value() - 2.85)/1.1
          Memo
            The Haun stage at which Terminal Spikelet occurs is determined from final leaf number using the approach described in [Brown_Anthesis_2013].
        AddFunction HaunStage
          VariableReference AppearedLeaves: VariableName=[Leaf].ExpandedCohortNo
          VariableReference ProportionOfExpandingLeaf: VariableName=[Leaf].NextExpandingLeafProportion
        Constant StemSenescenceAge: FixedValue=0
      ReproductiveOrgan Grain: GrowthRespiration=0; MaintenanceRespiration=0; RipeStage=Ripe
        HoldFunction NumberFunction: WhenToHold=Flowering
          MultiplyFunction GrainNumber
            Constant GrainsPerGramOfStem: FixedValue=26; Units=grains
            VariableReference StemMass: VariableName=[StemPlusPanicle].Wt
        MultiplyFunction NumberFunctionxxx
          VariableReference PanaclePopulation: VariableName=[Panicle].HeadNumber.Value()
          Constant SpikletsPerPanacle: FixedValue=25; Units=grains
          LinearInterpolationFunction GrainPerSpiklet: XProperty=[Grain].AccumThermalTime.Value()
            XYPairs: X=[0, 250]; Y=[0, 1.95]
              Memo
                Changing 4th line from 7:1 to 6:1.
                Leaf appearance rate calibrated using data from Gatton 2007 for Taipan and Coolibah
        Constant InitialGrainProportion: FixedValue=0.05
          Constant InitialGrainProportion: FixedValue=0.05
        Constant MaximumPotentialGrainSize: FixedValue=0.032; Units=g
        PhaseLookup DMDemandFunction
          PhaseLookupValue InitialPhase: Start=Flowering; End=StartGrainFill
            FillingRateFunction
              VariableReference NumberFunction: VariableName=[Grain].NumberFunction.Value()
              VariableReference FillingDuration: VariableName=[Phenology].GrainDevelopment.Target.Value()
              VariableReference ThermalTime: VariableName=[Phenology].ThermalTime.Value()
              MultiplyFunction PotentialSizeIncrement
                VariableReference InitialProportion: VariableName=[Grain].InitialGrainProportion.Value()
                VariableReference MaximumSize: VariableName=[Grain].MaximumPotentialGrainSize.Value()
          PhaseLookupValue LinearPhase: Start=StartGrainFill; End=EndGrainFill
            FillingRateFunction
              VariableReference NumberFunction: VariableName=[Grain].NumberFunction.Value()
              VariableReference FillingDuration: VariableName=[Phenology].GrainFilling.Target.Value()
              VariableReference ThermalTime: VariableName=[Phenology].ThermalTime.Value()
              MultiplyFunction PotentialSizeIncrement
                SubtractFunction ProportionLinearPhase
                  Constant One: FixedValue=1
                  VariableReference InitialProportion: VariableName=[Grain].InitialGrainProportion.Value()
                VariableReference MaximumSize: VariableName=[Grain].MaximumPotentialGrainSize.Value()
        Constant MinimumNConc: FixedValue=0.0123
        Constant MaxNConcDailyGrowth: FixedValue=0.03
        Constant MaximumNConc: FixedValue=0.03
        PhaseLookup NFillingRate
          PhaseLookupValue GrainFilling: Start=FlagLeaf; End=EndGrainFill
            FillingRateFunction
              VariableReference NumberFunction: VariableName=[Grain].NumberFunction.Value()
              AddFunction FillingDuration
                VariableReference FloweringToGrainFilling: VariableName=[Phenology].GrainDevelopment.Target.Value()
                VariableReference GrainFilling: VariableName=[Phenology].GrainFilling.Target.Value()
              VariableReference ThermalTime: VariableName=[Phenology].ThermalTime.Value()
              MultiplyFunction PotentialSizeIncrement
                VariableReference MaximumSize: VariableName=[Grain].MaximumPotentialGrainSize.Value()
                VariableReference MaximumNConc: VariableName=[Grain].MaximumNConc.Value()
        Constant WaterContent: FixedValue=0.12
        AccumulateFunction AccumThermalTime: StartStageName=FlagLeaf; EndStageName=Maturity; FractionRemovedOnCut=0; FractionRemovedOnHarvest=0; FractionRemovedOnGraze=0; FractionRemovedOnPrune=0
          VariableReference DailyThermalTimeValue: VariableName=[Phenology].ThermalTime.Value()
        ExpressionFunction Protein
          Expression=([Grain].Live.N + [Grain].Dead.N)/([Grain].Live.Wt + [Grain].Dead.Wt) * 100 * 5.71
        BiomassRemoval BiomassRemovalDefaults
          OrganBiomassRemovalType Harvest: FractionLiveToRemove=1; FractionDeadToRemove=0; FractionLiveToResidue=0; FractionDeadToResidue=0
          OrganBiomassRemovalType Cut: FractionLiveToRemove=1; FractionDeadToRemove=0; FractionLiveToResidue=0; FractionDeadToResidue=0
          OrganBiomassRemovalType Prune: FractionLiveToRemove=0; FractionDeadToRemove=0; FractionLiveToResidue=0.8; FractionDeadToResidue=0
          OrganBiomassRemovalType Graze: FractionLiveToRemove=0.6; FractionDeadToRemove=0; FractionLiveToResidue=0.2; FractionDeadToResidue=0
          OrganBiomassRemovalType Thin: FractionLiveToRemove=0; FractionDeadToRemove=0; FractionLiveToResidue=0.05; FractionDeadToResidue=0
        Constant DMConversionEfficiency: FixedValue=1
        Constant RemobilisationCost: FixedValue=0
        Constant CarbonConcentration: FixedValue=0.4
        Live Biomass
        Dead Biomass
      Leaf: MaxCover=1; Albedo=0.25; Gsmax=0.011; R50=150; MicroClimatePresent=true; KDead=0.1; MaximumMainStemLeafNumber=30
        zero: GrowthRespiration, MaintenanceRespiration, CurrentExpandingLeaf, StartFractionExpanded, FractionNextleafExpanded, DeadNodesYesterday, FRGR, PotentialEP, TipsAtEmergence, CohortsAtInitialisation, FractionDied
        LeafCohort InitialLeaves[1]: Rank=1; Area=200
          zero: NReallocationFactor, DMReallocationFactor, NRetranslocationFactor, DMRetranslocationFactor, ShadeInducedSenRate, SenescedFrac, DeltaPotentialArea, DeltaStressConstrainedArea, DeltaCarbonConstrainedArea, PotentialStructuralDMAllocation, PotentialMetabolicDMAllocation, MetabolicNReallocated, MetabolicWtReallocated, StorageNReallocated, StorageWtReallocated, MetabolicNRetranslocated, StorageNRetrasnlocated, DMRetranslocated, MetabolicNAllocation, StructuralDMAllocation, MetabolicDMAllocation, MaintenanceRespiration
        LeafCohort InitialLeaves[2]: Rank=2
          zero: NReallocationFactor, DMReallocationFactor, NRetranslocationFactor, DMRetranslocationFactor, ShadeInducedSenRate, SenescedFrac, DeltaPotentialArea, DeltaStressConstrainedArea, DeltaCarbonConstrainedArea, PotentialStructuralDMAllocation, PotentialMetabolicDMAllocation, MetabolicNReallocated, MetabolicWtReallocated, StorageNReallocated, StorageWtReallocated, MetabolicNRetranslocated, StorageNRetrasnlocated, DMRetranslocated, MetabolicNAllocation, StructuralDMAllocation, MetabolicDMAllocation, Area, MaintenanceRespiration
        ArrayBiomass CohortArrayLive: Propertys=[[Leaf].Live]; ArraySize=[Leaf].MaxNodeNo
        ArrayBiomass CohortArrayDead: Propertys=[[Leaf].Dead]; ArraySize=[Leaf].MaxNodeNo
        LeafCohortParameters CohortParameters: ExpansionStressValue=0
          Constant NReallocationFactor: FixedValue=1
          Constant MaintenanceRespirationFunction: FixedValue=0
          Constant NRetranslocationFactor: FixedValue=0.03
          Constant DMReallocationFactor: FixedValue=1
          Constant DMRetranslocationFactor: FixedValue=0.8
          MinimumFunction CellDivisionStress
            LinearInterpolationFunction WaterStressFactor: XProperty=[Oats].WaterSupplyDemandRatio
              XYPairs: X=[0.5, 1]; Y=[0.1, 1]
            LinearInterpolationFunction NitrogenStressFactor: XProperty=[Oats].Leaf.Fn
              XYPairs: X=[0, 0.5, 1]; Y=[0.1, 0.1, 1]
          MinimumFunction ExpansionStress
            LinearInterpolationFunction WaterStress: XProperty=[Root].WaterTensionFactor
              XYPairs: X=[0.1, 1, 1.3]; Y=[0, 1, 1]
            LinearInterpolationFunction TemperatureEffect: XProperty=[Phenology].MeanTemp.Value()
              XYPairs: X=[0, 12, 14]; Y=[0, 1, 1]
            LinearInterpolationFunction NitrogenStressFactor: XProperty=[Oats].Leaf.Fn
              XYPairs: X=[0, 0.5, 1]; Y=[0.1, 0.1, 1]
          MultiplyFunction MaxArea
            Constant AreaLargestLeaves: FixedValue=4000; Units=mm^2
              Memo
                As per NZ Lincoln data set
            LinearInterpolationFunction AgeFactor: XProperty=[Phenology].Stage
              XYPairs: X=[3, 3.45, 4]; Y=[0.1, 0.5, 1]
          MultiplyFunction GrowthDuration
            Constant Multiplier: FixedValue=1.75
            VariableReference Phyllochron: VariableName=[Structure].Phyllochron.Value()
            LinearInterpolationFunction AgeFactor: XProperty=[Phenology].Stage
              XYPairs: X=[3, 4, 5]; Y=[1, 1, 1]
          MultiplyFunction LagDuration
            LinearInterpolationFunction AgeFactor: XProperty=[Phenology].Stage
              XYPairs: X=[3, 4, 5]; Y=[0.4, 1, 1]
            SubtractFunction LastLeafDuration
              AddFunction ThermalTimeToRipe
                VariableReference EarlyReproductive: VariableName=[Phenology].EarlyReproductive.Target.Value()
                VariableReference GrainDevelopment: VariableName=[Phenology].GrainDevelopment.Target.Value()
                VariableReference GrainFilling: VariableName=[Phenology].GrainFilling.Target.Value()
                VariableReference Maturing: VariableName=[Phenology].Maturing.Target.Value()
                VariableReference Ripening: VariableName=[Phenology].Ripening.Target.Value()
              VariableReference SenescenceDuration: VariableName=[Leaf].CohortParameters.SenescenceDuration.Value()
          MultiplyFunction SenescenceDuration
            Constant Multiplier: FixedValue=6
            VariableReference Phyllochron: VariableName=[Structure].Phyllochron.Value()
          Constant DetachmentLagDuration: FixedValue=1000000
          Constant DetachmentDuration: FixedValue=1000000
          Constant RelativeBranchLeafSize: FixedValue=1
          LinearInterpolationFunction MaximumNConc: XProperty=[Phenology].Stage
            XYPairs: X=[3, 4, 6]; Y=[0.08, 0.05, 0.02]
          MultiplyFunction CriticalNConc
            LinearInterpolationFunction CriticalNConcAt350ppm: XProperty=[Phenology].Stage
              XYPairs: X=[3, 4, 6]; Y=[0.07, 0.04, 0.015]
            LinearInterpolationFunction CO2Factor: XProperty=[Weather].CO2
              XYPairs: X=[350, 700]; Y=[1, 0.93]
          LinearInterpolationFunction MinimumNConc: XProperty=[Phenology].Stage
            XYPairs: X=[3, 4, 6]; Y=[0.01, 0.005, 0.005]
          AddFunction DroughtInducedLagAcceleration
            Constant One: FixedValue=1
            MultiplyFunction Stress
              Constant StressResponseCoefficient: FixedValue=1
              LinearInterpolationFunction StressFactor: XProperty=[Oats].WaterSupplyDemandRatio
                XYPairs: X=[0, 0.5]; Y=[0.5, 0]
          AddFunction DroughtInducedSenAcceleration: same as Replacements.Oats.Leaf.CohortParameters.DroughtInducedLagAcceleration
          LinearInterpolationFunction SpecificLeafAreaMax: XProperty=[Phenology].Stage
            XYPairs: X=[2, 3, 4]; Y=[25000, 30000, 40000]
            Memo
              Initial SLA is determined as the average of max and min SLA
          LinearInterpolationFunction SpecificLeafAreaMin: XProperty=[Leaf].Fn
            XYPairs: X=[0.4, 1]; Y=[10000, 18000]
          Constant InitialNConc: FixedValue=0
          Constant StructuralFraction: FixedValue=0.3
          Constant StorageFraction: FixedValue=0
          Constant LeafSizeShapeParameter: FixedValue=0.3
          Constant SenessingLeafRelativeSize: FixedValue=1; Units=0-1
          MultiplyFunction ShadeInducedSenescenceRate
            LinearInterpolationFunction CoverEffect: XProperty=[Leaf].CohortCurrentRankCoverAbove
              XYPairs: X=[0, 0.9, 0.95, 1]; Y=[0, 0, 0.01, 0.03]
            VariableReference ThermalTime: VariableName=[Phenology].ThermalTime.Value()
          ArrayFunction LagDurationAgeMultiplier: Values=1 1 1
          ArrayFunction SenescenceDurationAgeMultiplier: Values=1 1 1
          ArrayFunction LeafSizeAgeMultiplier: Values=1 1 1 1 1 1 1 1 1 1 1 1
          Constant RemobilisationCost: FixedValue=0
          Constant CarbonConcentration: FixedValue=0.4
        RUEModel Photosynthesis
          Constant RUE: FixedValue=1.6
            Memo
              WHOLE PLANT RUE = bigger than RUE calculated using above ground biomass.
              1.35 measured for Oats at Gatton 2007 (Above ground biomass only) so assume 20% more for root biomass.
          WeightedTemperatureFunction FT: MaximumTemperatureWeighting=0.75
            XYPairs: X=[0, 15, 25, 35]; Y=[0, 1, 1, 0]
          LinearInterpolationFunction FN: XProperty=[Leaf].Fn
            XYPairs: X=[0, 1, 1.5]; Y=[0, 1, 1]
          LinearInterpolationFunction FW: XProperty=[Leaf].Fw
            XYPairs: X=[0, 1, 1]; Y=[0, 1, 1]
          LinearInterpolationFunction FVPD: XProperty=[Photosynthesis].VPD
            XYPairs: X=[0, 10, 40]; Y=[1, 1, 0]
          RUECO2Function FCO2: PhotosyntheticPathway=C3
          VariableReference RadnInt: VariableName=[Leaf].RadIntTot
        Constant FrostFraction: FixedValue=0
        VariableReference ThermalTime: VariableName=[Phenology].ThermalTime.Value()
        MinimumFunction FRGRFunction
          VariableReference RUE_FT: VariableName=[Leaf].Photosynthesis.FT.Value()
          MinimumFunction Others
            VariableReference RUE_FN: VariableName=[Leaf].Photosynthesis.FN.Value()
            VariableReference RUE_FVPD: VariableName=[Leaf].Photosynthesis.FVPD.Value()
        BiomassRemoval BiomassRemovalDefaults
          OrganBiomassRemovalType Harvest: FractionLiveToRemove=0; FractionDeadToRemove=0; FractionLiveToResidue=0.3; FractionDeadToResidue=0.3
          OrganBiomassRemovalType Cut: FractionLiveToRemove=0.8; FractionDeadToRemove=0.8; FractionLiveToResidue=0; FractionDeadToResidue=0
          OrganBiomassRemovalType Prune: FractionLiveToRemove=0; FractionDeadToRemove=0; FractionLiveToResidue=0.6; FractionDeadToResidue=0.6
          OrganBiomassRemovalType Graze: FractionLiveToRemove=0.6; FractionDeadToRemove=0.6; FractionLiveToResidue=0.1; FractionDeadToResidue=0.1
          OrganBiomassRemovalType Thin: FractionLiveToRemove=0; FractionDeadToRemove=0; FractionLiveToResidue=0.05; FractionDeadToResidue=0.05
        Constant ExtinctionCoeff: FixedValue=0.45
          Memo
            Experimenting with extinction coeff as per measured in Gatton 2007 (0.45). Orig value = wheat = 0.5
        Constant StructuralFraction: FixedValue=0.5
        Constant DMConversionEfficiency: FixedValue=1
        ApexStandard
        Constant RemobilisationCost: FixedValue=0
        Constant CarbonConcentration: FixedValue=0.4
      GenericOrgan Stem
        PhaseLookup StructuralFraction
          PhaseLookupValue VegetativeGrowth: Start=Sowing; End=Flowering
            Constant Fraction: FixedValue=0.7
          PhaseLookupValue ReproductiveGrowth: Start=Flowering; End=HarvestRipe
            Constant Fraction: FixedValue=0.5
        Constant SenescenceRate: FixedValue=0; Units=/d
        LinearInterpolationFunction MaximumNConc: XProperty=[Phenology].Stage
          XYPairs: X=[3, 4, 4.5, 6]; Y=[0.05, 0.04, 0.015, 0.012]
        Constant MinimumNConc: FixedValue=0.0018
        PhaseBasedSwitch NitrogenDemandSwitch: Start=Emergence; End=StartGrainFill
        Constant NReallocationFactor: FixedValue=0
        PhaseLookup NRetranslocationFactor
          PhaseLookupValue VegetativeGrowth: Start=Sowing; End=Flowering
            Constant Fraction: FixedValue=0
          PhaseLookupValue ReproductiveGrowth: Start=Flowering; End=HarvestRipe
            Constant Fraction: FixedValue=0.5
        PhaseLookup DMRetranslocationFactor
          PhaseLookupValue VegetativeGrowth: Start=Emergence; End=StartGrainFill
            Constant DMRetranslocationFactor: FixedValue=0
          PhaseLookupValue ReproductiveGrowth: Start=StartGrainFill; End=EndGrainFill
            Constant DMRetranslocationFactor: FixedValue=0
        PartitionFractionDemandFunction DMDemandFunction
          PhaseLookup PartitionFraction
            PhaseLookupValue PreStemElongation: Start=Emergence; End=TerminalSpikelet
              Constant StemFraction: FixedValue=0.4
            PhaseLookupValue StemElongation: Start=TerminalSpikelet; End=FlagLeaf
              Constant StemFraction: FixedValue=0.7
            PhaseLookupValue EarEmergence: Start=FlagLeaf; End=Flowering
              Constant StemFraction: FixedValue=0.7
        BiomassRemoval BiomassRemovalDefaults
          OrganBiomassRemovalType Harvest: FractionLiveToRemove=0.5; FractionDeadToRemove=0; FractionLiveToResidue=0.1; FractionDeadToResidue=0
          OrganBiomassRemovalType Cut: FractionLiveToRemove=0.8; FractionDeadToRemove=0; FractionLiveToResidue=0; FractionDeadToResidue=0
          OrganBiomassRemovalType Prune: FractionLiveToRemove=0; FractionDeadToRemove=0; FractionLiveToResidue=0.6; FractionDeadToResidue=0
          OrganBiomassRemovalType Graze: FractionLiveToRemove=0.6; FractionDeadToRemove=0; FractionLiveToResidue=0.2; FractionDeadToResidue=0
          OrganBiomassRemovalType Thin: FractionLiveToRemove=0; FractionDeadToRemove=0; FractionLiveToResidue=0.05; FractionDeadToResidue=0
        DivideFunction PercentWSC
          VariableReference WSC: VariableName=[Stem].Live.StorageWt
          VariableReference StemWt: VariableName=[Stem].Live.Wt
        Constant InitialWtFunction: FixedValue=0; Units=g/m^2
        Constant DetachmentRateFunction: FixedValue=0; Units=/d
        Constant MaintenanceRespirationFunction: FixedValue=0; Units=0-1
        Constant DMConversionEfficiency: FixedValue=1; Units=0-1
        Constant DMReallocationFactor: FixedValue=0
        VariableReference CriticalNConc: VariableName=[Stem].MinimumNConc.Value()
        Constant RemobilisationCost: FixedValue=0
        Constant CarbonConcentration: FixedValue=0.4
      Root: GrowthRespiration=0; MaintenanceRespiration=0
        Constant KLModifier: FixedValue=1
        Constant SoilWaterEffect: FixedValue=1
        Constant MaxDailyNUptake: FixedValue=20
        Constant SenescenceRate: FixedValue=0.005
        Constant StructuralFraction: FixedValue=1
        Constant MaximumRootDepth: FixedValue=1000000
        Constant MaximumNConc: FixedValue=0.01
        Constant MinimumNConc: FixedValue=0.01
        PhaseBasedSwitch NitrogenDemandSwitch: Start=Germination; End=Maturity
        BiomassRemoval BiomassRemovalDefaults
          OrganBiomassRemovalType Harvest: FractionLiveToRemove=0; FractionDeadToRemove=0; FractionLiveToResidue=0.2; FractionDeadToResidue=0
          OrganBiomassRemovalType Cut: FractionLiveToRemove=0; FractionDeadToRemove=0; FractionLiveToResidue=0.3; FractionDeadToResidue=0
          OrganBiomassRemovalType Prune: FractionLiveToRemove=0; FractionDeadToRemove=0; FractionLiveToResidue=0.1; FractionDeadToResidue=0
          OrganBiomassRemovalType Graze: FractionLiveToRemove=0; FractionDeadToRemove=0; FractionLiveToResidue=0.15; FractionDeadToResidue=0
          OrganBiomassRemovalType Thin: FractionLiveToRemove=0; FractionDeadToRemove=0; FractionLiveToResidue=0.05; FractionDeadToResidue=0
        Constant KNO3: FixedValue=0.02
        Constant KNH4: FixedValue=0.01
        Constant InitialDM: FixedValue=0.005; Units=g/plant
        Constant SpecificRootLength: FixedValue=105; Units=m/g
        MultiplyFunction RootFrontVelocity
          PhaseLookup PotentialRootFrontVelocity
            PhaseLookupValue PreEmergence: Start=Germination; End=Emergence
              Constant Value: FixedValue=5; Units=mm/d
            PhaseLookupValue PostEmergence: Start=Emergence; End=Maturity
              Constant Value: FixedValue=20; Units=mm/d
          WeightedTemperatureFunction TemperatureFactor: MaximumTemperatureWeighting=0.5
            XYPairs: X=[0, 15, 25, 35]; Y=[0, 1, 1, 0]
          LinearInterpolationFunction WaterFactor: XProperty=[SoilWaterScale]
            SoilWaterScale
            XYPairs: X=[0, 0.25, 1]; Y=[0, 1, 1]
        LinearInterpolationFunction NUptakeSWFactor: XProperty=[SoilWaterScale]
          SoilWaterScale
          XYPairs: X=[0, 1]; Y=[0, 1]
          Memo
            This is modelled in the same way as the old wheat model where potential N uptake is decreased as the soil dries as described by NUptakeSWFactor
        PartitionFractionDemandFunction DMDemandFunction
          PhaseLookup PartitionFraction
            PhaseLookupValue PreEmergence: Start=Germination; End=Emergence
              Constant Value: FixedValue=0
            PhaseLookupValue PreFlowering: Start=Emergence; End=Flowering
              LinearInterpolationFunction AgeFactor: XProperty=[Phenology].Stage
                XYPairs: X=[3, 4]; Y=[0.5, 0.2]
            PhaseLookupValue PostFlowering: Start=Flowering; End=EndGrainFill
              Constant Value: FixedValue=0.2
        Constant DMConversionEfficiency: FixedValue=1
        Constant MaintenanceRespirationFunction: FixedValue=1
        Constant RemobilisationCost: FixedValue=0
        Constant CarbonConcentration: FixedValue=0.4
      GenericOrgan Panicle
        PopulationBasedDemandFunction DMDemandFunction
          VariableReference ThermalTime: VariableName=[Phenology].ThermalTime.Value()
          Constant ExpansionStressXXXX: FixedValue=1
          MinimumFunction ExpansionStress
            LinearInterpolationFunction WaterStress: XProperty=[Root].WaterTensionFactor
              XYPairs: X=[0.1, 1, 1.3]; Y=[0, 1, 1]
            LinearInterpolationFunction TemperatureEffect: XProperty=[Phenology].MeanTemp.Value()
              XYPairs: X=[0, 12, 14]; Y=[0, 1, 1]
            LinearInterpolationFunction NitrogenStressFactor: XProperty=[Oats].Leaf.Fn
              XYPairs: X=[0, 0.5, 1]; Y=[0.1, 0.1, 1]
          VariableReference OrganPopulation: VariableName=[Panicle].HeadNumber.Value()
          Constant StartStage: FixedValue=4.8
          Constant MaximumOrganWt: FixedValue=0.4; Units=g
          AddFunction GrowthDuration
            VariableReference EarlyReproductive: VariableName=[Phenology].EarlyReproductive.Target.Value()
            VariableReference GrainDevelopment: VariableName=[Phenology].GrainDevelopment.Target.Value()
        Constant NReallocationFactor: FixedValue=0
        Constant NRetranslocationFactor: FixedValue=0.3
        Constant MaximumNConc: FixedValue=0.025
        Constant StructuralFraction: FixedValue=0.9
        Constant SenescenceRate: FixedValue=0; Units=/d
        Constant MinimumNConc: FixedValue=0.02
        BiomassRemoval BiomassRemovalDefaults: same as Replacements.Oats.Stem.BiomassRemovalDefaults
        PhaseBasedSwitch NitrogenDemandSwitch: Start=Emergence; End=StartGrainFill
        PhaseLookup DMRetranslocationFactor
          PhaseLookupValue VegetativeGrowth: Start=Emergence; End=StartGrainFill
            Constant DMRetranslocationFactor: FixedValue=0
          PhaseLookupValue ReproductiveGrowth: Start=StartGrainFill; End=EndGrainFill
            Constant DMRetranslocationFactor: FixedValue=0.5
        Constant InitialWtFunction: FixedValue=0; Units=g/m^2
        Constant DetachmentRateFunction: FixedValue=0; Units=/d
        Constant MaintenanceRespirationFunction: FixedValue=0; Units=0-1
        Constant DMConversionEfficiency: FixedValue=1; Units=0-1
        MultiplyFunction HeadNumber
          VariableReference StemNumber: VariableName=[Structure].TotalStemPopn
          Constant PaniclesPerStem: FixedValue=0.83; Units=0-1
        Constant DMReallocationFactor: FixedValue=0
        VariableReference CriticalNConc: VariableName=[Panicle].MinimumNConc.Value()
        Constant RemobilisationCost: FixedValue=0
        Constant CarbonConcentration: FixedValue=0.4
      CompositeBiomass AboveGround
        Propertys=[[Leaf].Live, [Leaf].Dead, [Stem].Live, [Stem].Dead, [Panicle].Live, [Panicle].Dead, [Grain].Live, [Grain].Dead]
      CompositeBiomass AboveGroundLive: Propertys=[[Leaf].Live, [Stem].Live, [Panicle].Live, [Grain].Live]
      CompositeBiomass AboveGroundDead: Propertys=[[Leaf].Dead, [Stem].Dead, [Panicle].Dead, [Grain].Dead]
      CompositeBiomass BelowGround: Propertys=[[Root].Live, [Root].Dead]
      CompositeBiomass Total
        Propertys=[[Leaf].Live, [Leaf].Dead, [Stem].Live, [Stem].Dead, [Root].Live, [Root].Dead, [Panicle].Live, [Panicle].Dead, [Grain].Live, [Grain].Dead]
      CompositeBiomass TotalLive
        Propertys=[[Leaf].Live, [Stem].Live, [Root].Live, [Panicle].Live, [Grain].Live]
      CompositeBiomass TotalDead
        Propertys=[[Leaf].Dead, [Stem].Dead, [Root].Dead, [Panicle].Dead, [Grain].Dead]
      CompositeBiomass Ear
        Propertys=[[Panicle].Live, [Grain].Live, [Panicle].Dead, [Grain].Dead]
        Memo
          The Ear composite biomass object includes the Live and dead pools of all organs within the Ear to allow output for total dry matter and Nutrient contents, including total structural, non-structural and metabolic pools.
      CompositeBiomass StemPlusPanicle: Propertys=[[Stem].Live, [Panicle].Live, [Stem].Dead, [Panicle].Dead]
      CultivarFolder Cultivars
        Cultivar Drummond
          Command:
            [Phenology].MinimumLeafNumber.FixedValue = 8.5
            [Phenology].VrnSensitivity.FixedValue = 7
            [Phenology].PpSensitivity.FixedValue = 3
            [Phenology].EarlyReproductiveLongDayBase.FixedValue = 3
            [Phenology].EarlyReproductivePpSensitivity.FixedValue = 2
            [Structure].Phyllochron.BasePhyllochron.FixedValue = 75
            [Structure].BranchingRate.StressFactors.CoverEffect.XYPairs.X = 0,0.2,0.35
            [Leaf].CohortParameters.MaxArea.AreaLargestLeaves.FixedValue = 4000
            [Structure].BranchingRate.PotentialBranchingRate.Vegetative.PotentialBranchingRate.XYPairs.X = 1,2,3.99,4,5,6,7,8,9
            [Leaf].CohortParameters.GrowthDuration.AgeFactor.XYPairs.Y = 1,1,0.1
            [Grain].MaximumPotentialGrainSize.FixedValue = 0.05
            [Grain].NumberFunction.GrainNumber.GrainsPerGramOfStem.FixedValue = 40
        Cultivar Drummond_orig
          Command:
            [Phenology].MinimumLeafNumber.FixedValue = 9
            [Phenology].VrnSensitivity.FixedValue = 0
            [Phenology].PpSensitivity.FixedValue = 10
            [Structure].Phyllochron.BasePhyllochron.FixedValue = 80
            [Structure].BranchingRate.StressFactors.CoverEffect.XYPairs.X = 0,0.2,0.35
            [Leaf].CohortParameters.MaxArea.AreaLargestLeaves.FixedValue = 4000
            [Structure].BranchingRate.PotentialBranchingRate.Vegetative.PotentialBranchingRate.XYPairs.X = 1,2,3.99,4,5,6,7,8,9
        Cultivar Milton
          Command:
            [Phenology].MinimumLeafNumber.FixedValue = 8.5
            [Phenology].VrnSensitivity.FixedValue = 7
            [Phenology].PpSensitivity.FixedValue = 3
            [Phenology].EarlyReproductiveLongDayBase.FixedValue = 2
            [Phenology].EarlyReproductivePpSensitivity.FixedValue = 0
            [Structure].Phyllochron.BasePhyllochron.FixedValue = 105
            [Leaf].CohortParameters.MaxArea.AreaLargestLeaves.FixedValue = 4000
            [Leaf].CohortParameters.SenescenceDuration.Multiplier.FixedValue = 3
            [Leaf].CohortParameters.GrowthDuration.AgeFactor.XYPairs.Y = 1,1,0.1
            [Grain].MaximumPotentialGrainSize.FixedValue = 0.05
            [Grain].NumberFunction.GrainNumber.GrainsPerGramOfStem.FixedValue = 50
            [Leaf].ExtinctionCoeff.FixedValue = 0.6
        Cultivar Hokonui
          Command:
            [Phenology].MinimumLeafNumber.FixedValue = 9
            [Phenology].VrnSensitivity.FixedValue = 0
            [Phenology].PpSensitivity.FixedValue = 10
            [Structure].Phyllochron.BasePhyllochron.FixedValue = 90
            [Leaf].CohortParameters.GrowthDuration.AgeFactor.XYPairs.Y = 1,1,0.1
        Cultivar Stampede
          Command:
            [Phenology].MinimumLeafNumber.FixedValue = 9
            [Phenology].VrnSensitivity.FixedValue = 0
            [Phenology].PpSensitivity.FixedValue = 10
            [Structure].Phyllochron.BasePhyllochron.FixedValue = 80
            [Leaf].CohortParameters.GrowthDuration.AgeFactor.XYPairs.Y = 1,1,0.1
        Cultivar Coolibah
          Command:
            [Phenology].MinimumLeafNumber.FixedValue = 9
            [Phenology].VrnSensitivity.FixedValue = 5.3
            [Phenology].PpSensitivity.FixedValue = 3.0
            [Structure].Phyllochron.BasePhyllochron.FixedValue = 90
            [Leaf].CohortParameters.MaxArea.AreaLargestLeaves.FixedValue = 5000
            [Phenology].EarlyReproductivePpSensitivity.FixedValue = 0
            [Phenology].EarlyReproductiveLongDayBase.FixedValue = 2
            [Structure].BranchingRate.StressFactors.CoverEffect.XYPairs.X = 0,0.25,0.5
          Memo
            Leaf appearance rate calibrated using data from Gatton 2007 for Taipan and Coolibah
        Cultivar Taipan
          Command:
            [Phenology].MinimumLeafNumber.FixedValue = 9
            [Phenology].VrnSensitivity.FixedValue = 10
            [Phenology].PpSensitivity.FixedValue = 7.5
            [Phenology].EarlyReproductivePpSensitivity.FixedValue = 3
            [Phenology].EarlyReproductiveLongDayBase.FixedValue = 3
            [Structure].Phyllochron.BasePhyllochron.FixedValue = 90
            [Leaf].CohortParameters.MaxArea.AreaLargestLeaves.FixedValue = 8000
          Memo
            Leaf appearance rate calibrated using data from Gatton 2007 for Taipan and Coolibah
        Cultivar Wintaroo
          Command:
            [Phenology].MinimumLeafNumber.FixedValue = 7
            [Phenology].VrnSensitivity.FixedValue = 2
            [Phenology].PpSensitivity.FixedValue = 2
            [Phenology].EarlyReproductivePpSensitivity.FixedValue = 0
            [Phenology].EarlyReproductiveLongDayBase.FixedValue = 2
            [Structure].Phyllochron.BasePhyllochron.FixedValue = 90
            [Structure].BranchingRate.PotentialBranchingRate.Vegetative.PotentialBranchingRate.XYPairs.X = 1,2,3.99,4,5,6,7,8,9
            [Leaf].CohortParameters.MaxArea.AreaLargestLeaves.FixedValue = 5000
            [Panicle].HeadNumber.PaniclesPerStem.FixedValue = 0.6
        Cultivar Kangaroo
          Command:
            [Phenology].MinimumLeafNumber.FixedValue = 7
            [Phenology].VrnSensitivity.FixedValue = 4
            [Phenology].PpSensitivity.FixedValue = 4
            [Phenology].EarlyReproductivePpSensitivity.FixedValue = 0
            [Phenology].EarlyReproductiveLongDayBase.FixedValue = 2
            [Structure].Phyllochron.BasePhyllochron.FixedValue = 90
            [Leaf].CohortParameters.MaxArea.AreaLargestLeaves.FixedValue = 7000
            [Leaf].CohortParameters.SpecificLeafAreaMax.XYPairs.Y = 20000,30000,30000
            [Structure].BranchingRate.PotentialBranchingRate.Vegetative.PotentialBranchingRate.XYPairs.X = 1,2,3.99,4,5,6,7,8,9
        Cultivar Brusher
          Command:
            [Phenology].MinimumLeafNumber.FixedValue = 7
            [Phenology].VrnSensitivity.FixedValue = 1
            [Phenology].PpSensitivity.FixedValue = 1
            [Phenology].EarlyReproductivePpSensitivity.FixedValue = 0
            [Phenology].EarlyReproductiveLongDayBase.FixedValue = 2
            [Structure].Phyllochron.BasePhyllochron.FixedValue = 80
            [Leaf].CohortParameters.MaxArea.AreaLargestLeaves.FixedValue = 8000
            [Leaf].CohortParameters.SpecificLeafAreaMax.XYPairs.Y = 20000,30000,30000
            [Structure].BranchingRate.PotentialBranchingRate.Vegetative.PotentialBranchingRate.XYPairs.X = 1,2,3.99,4,5,6,7,8,9
        Cultivar Algerian
          Command:
            [Phenology].MinimumLeafNumber.FixedValue = 9
            [Phenology].VrnSensitivity.FixedValue = 12
            [Phenology].PpSensitivity.FixedValue = 6
            [Phenology].EarlyReproductivePpSensitivity.FixedValue = 4
            [Phenology].EarlyReproductiveLongDayBase.FixedValue = 3
            [Structure].Phyllochron.BasePhyllochron.FixedValue = 105
        Cultivar Nugene
          Command:
            [Phenology].MinimumLeafNumber.FixedValue = 9
            [Phenology].VrnSensitivity.FixedValue = 10
            [Phenology].PpSensitivity.FixedValue = 7.5
            [Phenology].EarlyReproductivePpSensitivity.FixedValue = 3
            [Phenology].EarlyReproductiveLongDayBase.FixedValue = 3
            [Structure].Phyllochron.BasePhyllochron.FixedValue = 90
            [Leaf].CohortParameters.MaxArea.AreaLargestLeaves.FixedValue = 8000
        Cultivar Drover
          Command:
            [Phenology].MinimumLeafNumber.FixedValue = 9
            [Phenology].VrnSensitivity.FixedValue = 4
            [Phenology].PpSensitivity.FixedValue = 9
            [Phenology].EarlyReproductivePpSensitivity.FixedValue = 6
            [Phenology].EarlyReproductiveLongDayBase.FixedValue = 3
            [Structure].Phyllochron.BasePhyllochron.FixedValue = 80
            [Leaf].CohortParameters.MaxArea.AreaLargestLeaves.FixedValue = 8000
        Cultivar Genie: same as Replacements.Oats.Cultivars.Nugene
        Cultivar Aladdin: same as Replacements.Oats.Cultivars.Nugene
        Cultivar Comet: same as Replacements.Oats.Cultivars.Nugene
        Cultivar Wizard: same as Replacements.Oats.Cultivars.Nugene
        Cultivar Bond: same as Replacements.Oats.Cultivars.Nugene
    Manager Harvesting
```csharp
using System;
using Models.Core;
using System.Collections.Generic;
using System.Text;
using Models.Soils;
using Models.PMF;
using Models;
using System.Xml.Serialization;
using APSIM.Shared.Utilities;

namespace Models
{
    [Serializable] 
    public class Script : Model
    {
        [Link] Plant Oats;
        [EventSubscribe("DoManagement")]
        private void OnDoManagement(object sender, EventArgs e)
        {
            if (Oats.Phenology.CurrentPhaseName == "Maturing")
            {
                Oats.Harvest();
                Oats.EndCrop();
            }
        }
    }
}
```
  DataStore
    ExcelInput Observed: FileName=Observed.xlsx; SheetNames=[Observed, MaxLeafSize]
    PredictedObserved DailyPO: PredictedTableName=DailyReport; ObservedTableName=Observed; FieldNameUsedForMatch=Clock.Today
    PredictedObserved HarvestPO: PredictedTableName=HarvestReport; ObservedTableName=Observed; FieldNameUsedForMatch=Oats.Phenology.CurrentStageName
    ExcelInput LRCOatsPhenology: FileName=LRCOatsPhenology.xlsx; SheetNames=[LRCOatsPhenology]
  Folder Validation
    Memo
      A test dataset has been developed to test the APSIM Oats model for a range of environmental (soil and climate) conditions, management options (sowing dates, populations, nitrogen rates, row spacing, irrigation), genetic backgrounds (different regions, cultivar types) and for special considerations such as crop damage.  These tests have been groups into various geographical regions to allow the user to evaluate the suitability of the model for their particular region of interest.  Graphs of model performance are provided for yield, biomass production, canopy development, phenological development, water and nitrogen uptake, and grain yield components.
    Folder Combined Results
      Memo Combined Results
        Simulation results for the combined datasets from the various countries are shown in the following graphs.  The model is able to adequately capture the influence of growing conditions (soil, climate) and management (population, Nitrogen, irrigation, sowing date).
    Folder New Zealand
      Experiment RS_Oats_9899
        Memo Experiment Description
          Martin, R. J., et al. Effects of Timing and Intensity of Drought on the Yield of Oats (Avena sativa L.). Australian Agronomy
          Hobart.
          	The response of oats (Avena sativa L.) to timing and intensity of drought was determined in a mobile
          rainshelter, which excluded rainfall during crop growth. Ten irrigation treatments subjected the crops to
          drought of varying duration at different stages during plant growth; the crops were otherwise fully
          irrigated. Oat grain yield generally increased linearly with cumulative water use, and decreased linearly as
          the maximum potential soil moisture deficit experienced during crop growth increased, regardless of the
          timing of drought. The exception to this was the no drought (fully irrigated) treatment, where lodging
          reduced panicle number and grain weight compared to early drought treatments. Drought affected yield
          mainly by reducing panicle and grain number, effects on grain weight were small. . Relieving early drought
          through late irrigation led to more late tillers, more panicles, heavier grains, and later maturity. Full and
          late drought increased screenings.
        Factors
          Factor _Irrig
            Factor Nill
              Specifications:
                [Irrig]
                [Water]
                [Initial water]
              Operations Irrig
                1999-02-10  [Oats].Harvest();
                1999-02-10  [Oats].EndCrop();
              Water
                Thickness  BD     AirDry  LL15  DUL   SAT   KS
                200        1.311  0.07    0.12  0.32  0.42  4832.039
                200        1.524  0.14    0.14  0.3   0.41  389.229
                200        1.65   0.14    0.14  0.27  0.34  16.362
                200        1.601  0.1     0.1   0.24  0.32  97.995
                200        1.601  0.14    0.14  0.23  0.35  97.995
                200        1.601  0.16    0.16  0.23  0.34  97.995
                200        1.601  0.09    0.09  0.25  0.31  97.995
                200        1.601  0.06    0.06  0.25  0.31  97.995
                400        1.601  0.06    0.06  0.17  0.31  97.995
                SoilCrop OatsSoil: LL=[0.12, 0.14, 0.14, 0.1, 0.14, 0.16, 0.09, 0.06, 0.06]; KL=[0.06, 0.07, 0.04, 0.04, 0.05, 0.04, 0.03, 0.02, 0.01]; XF=[1, 1, 1, 1, 1, 1, 1, 1, 1]
              Sample Initial water: Thickness=[200, 200, 200, 200, 200, 200, 200, 200, 400]; SW=[0.32, 0.3, 0.27, 0.24, 0.23, 0.23, 0.13, 0.17, 0.27]; NO3Units=kgha; NH4Units=ppm; SWUnits=Volumetric; OCUnits=Total; PHUnits=Water
            Factor Full
              Specifications:
                [Irrig]
                [Water]
                [Initial water]
              Operations Irrig
                1998-10-31  [Irrigation].Apply(30);
                1998-11-09  [Irrigation].Apply(35.3);
                1998-11-16  [Irrigation].Apply(45);
                1998-11-23  [Irrigation].Apply(44);
                1998-11-30  [Irrigation].Apply(30.1);
                1998-12-07  [Irrigation].Apply(41.6);
                1998-12-14  [Irrigation].Apply(55);
                1998-12-21  [Irrigation].Apply(50);
                1998-12-28  [Irrigation].Apply(55);
                1999-01-05  [Irrigation].Apply(53);
                1999-01-11  [Irrigation].Apply(50.4);
                1999-01-18  [Irrigation].Apply(49);
                1999-01-25  [Irrigation].Apply(49);
                1999-02-01  [Irrigation].Apply(51.2);
                1999-02-08  [Irrigation].Apply(53);
                1999-02-15  [Irrigation].Apply(34);
                1999-02-22  [Irrigation].Apply(37);
                1999-03-01  [Irrigation].Apply(24);
                1999-03-03  [Oats].Harvest();
                1999-03-03  [Oats].EndCrop();
              Water
                Thickness  BD     AirDry  LL15   DUL    SAT    KS
                200        1.311  0.05    0.1    0.3    0.419  4832.039
                200        1.524  0.05    0.1    0.3    0.405  389.229
                200        1.65   0.149   0.149  0.28   0.342  16.362
                200        1.601  0.129   0.129  0.255  0.322  97.995
                200        1.601  0.155   0.155  0.288  0.348  97.995
                200        1.601  0.149   0.149  0.28   0.342  97.995
                200        1.601  0.053   0.053  0.107  0.307  97.995
                200        1.601  0.061   0.061  0.122  1.31   97
                400        1.601  0.06    0.06   0.17   0.31   97.995
                SoilCrop OatsSoil: LL=[0.1, 0.1, 0.149, 0.129, 0.155, 0.149, 0.053, 0.061, 0.06]; KL=[0.06, 0.05, 0.04, 0.06, 0.05, 0.02, 0.02, 0.01, 0.01]; XF=[1, 1, 1, 1, 1, 1, 1, 1, 1]
              Memo
                Added an Irrigation on 30 Oct after looking at data and seeing a Panicle.
              Sample Initial water: Thickness=[200, 200, 200, 200, 200, 200, 200, 200, 400]; SW=[0.3, 0.3, 0.28, 0.26, 0.29, 0.28, 0.11, 0.12, 0.27]; NO3Units=kgha; NH4Units=ppm; SWUnits=Volumetric; OCUnits=Total; PHUnits=Water
            Factor LD1
              Specifications:
                [Irrig]
                [Water]
                [Initial water]
              Operations Irrig
                1998-10-27  [Irrigation].Apply(50);
                1998-11-02  [Irrigation].Apply(30);
                1999-02-10  [Oats].Harvest();
                1999-02-10  [Oats].EndCrop();
              Water
                Thickness  BD     AirDry  LL15  DUL   SAT   KS
                200        1.311  0.05    0.1   0.32  0.42  4800
                200        1.524  0.12    0.12  0.3   0.41  390
                200        1.65   0.13    0.13  0.26  0.34  16
                200        1.601  0.13    0.13  0.28  0.32  98
                200        1.601  0.17    0.17  0.27  0.35  97
                200        1.601  0.18    0.18  0.28  0.34  97
                200        1.601  0.05    0.05  0.2   0.31  97
                200        1.601  0.06    0.06  0.22  0.31  97
                400        1.601  0.06    0.06  0.17  0.31  97.995
                SoilCrop OatsSoil: LL=[0.1, 0.12, 0.13, 0.129, 0.17, 0.18, 0.053, 0.061, 0.06]; KL=[0.06, 0.05, 0.04, 0.04, 0.04, 0.03, 0.02, 0.01, 0.01]; XF=[1, 1, 1, 1, 1, 1, 1, 1, 1]
              Sample Initial water: Thickness=[200, 200, 200, 200, 200, 200, 200, 200, 400]; SW=[0.28, 0.3, 0.26, 0.28, 0.27, 0.28, 0.2, 0.22, 0.27]; NO3Units=kgha; NH4Units=ppm; SWUnits=Volumetric; OCUnits=Total; PHUnits=Water
            Factor LD4
              Specifications:
                [Irrig]
                [Water]
                [Initial water]
              Operations Irrig
                1998-10-27  [Irrigation].Apply(50)
                1998-11-02  [Irrigation].Apply(30)
                1998-11-09  [Irrigation].Apply( 35.3)
                1998-11-16  [Irrigation].Apply(45)
                1998-11-23  [Irrigation].Apply( 44)
                1998-11-30  [Irrigation].Apply(30.1 )
                1998-12-07  [Irrigation].Apply( 41.6)
                1999-02-10  [Oats].Harvest();
                1999-02-10  [Oats].EndCrop();
              Water
                Thickness  BD     AirDry  LL15  DUL   SAT   KS
                200        1.311  0.05    0.1   0.32  0.42  4832.039
                200        1.524  0.13    0.13  0.3   0.41  389.229
                200        1.65   0.1     0.1   0.26  0.34  16.362
                200        1.601  0.09    0.08  0.24  0.32  97.995
                200        1.601  0.16    0.16  0.27  0.35  97.995
                200        1.601  0.16    0.16  0.23  0.34  97.995
                200        1.601  0.08    0.08  0.15  0.31  97.995
                200        1.601  0.06    0.06  0.2   0.31  97.995
                400        1.601  0.06    0.06  0.17  0.31  97.995
                SoilCrop OatsSoil: LL=[0.1, 0.13, 0.1, 0.09, 0.16, 0.16, 0.08, 0.061, 0.06]; KL=[0.06, 0.06, 0.05, 0.06, 0.05, 0.02, 0.02, 0.01, 0.01]; XF=[1, 1, 1, 1, 1, 1, 1, 1, 1]
              Sample Initial water: Thickness=[200, 200, 200, 200, 200, 200, 200, 200, 400]; SW=[0.32, 0.3, 0.26, 0.19, 0.25, 0.21, 0.13, 0.2, 0.27]; NO3Units=kgha; NH4Units=ppm; SWUnits=Volumetric; OCUnits=Total; PHUnits=Water
            Factor ED1
              Specifications:
                [Irrig]
                [Water]
                [Initial water]
              Operations Irrig
                1998-11-16  [Irrigation].Apply(  45 )
                1998-11-23  [Irrigation].Apply(  44 )
                1998-11-30  [Irrigation].Apply(  30.1 )
                1998-12-07  [Irrigation].Apply(  41.6 )
                1998-12-14  [Irrigation].Apply(  55 )
                1998-12-21  [Irrigation].Apply(  50 )
                1998-12-28  [Irrigation].Apply(  55 )
                1999-01-05  [Irrigation].Apply(  53 )
                1999-01-11  [Irrigation].Apply( 50.4 )
                1999-01-18  [Irrigation].Apply(  49 )
                1999-01-25  [Irrigation].Apply(  49 )
                1999-02-01  [Irrigation].Apply(  51.2 )
                1999-02-08  [Irrigation].Apply(  53 )
                1999-02-15  [Irrigation].Apply(  34 )
                1999-02-22  [Irrigation].Apply(  37 )
                1999-03-01  [Irrigation].Apply(  24 )
                1999-03-03  [Oats].Harvest();
                1999-03-03  [Oats].EndCrop();
              Water
                Thickness  BD     AirDry  LL15  DUL   SAT   KS
                200        1.31   0.05    0.1   0.25  0.42  4832.039
                200        1.52   0.1     0.1   0.33  0.41  389.229
                200        1.65   0.15    0.15  0.27  0.34  16.362
                200        1.6    0.14    0.14  0.22  0.32  97.995
                200        1.6    0.15    0.15  0.2   0.35  97.995
                200        1.6    0.15    0.15  0.25  0.34  97.995
                200        1.6    0.1     0.1   0.19  0.31  97.995
                200        1.6    0.06    0.06  0.17  0.31  97.995
                400        1.601  0.06    0.06  0.17  0.31  97.995
                SoilCrop OatsSoil: LL=[0.1, 0.1, 0.149, 0.14, 0.15, 0.149, 0.1, 0.06, 0.06]; KL=[0.06, 0.05, 0.04, 0.06, 0.05, 0.02, 0.02, 0.01, 0.01]; XF=[1, 1, 1, 1, 1, 1, 1, 1, 1]
              Sample Initial water: Thickness=[200, 200, 200, 200, 200, 200, 200, 200, 400]; SW=[0.25, 0.33, 0.27, 0.22, 0.2, 0.25, 0.19, 0.17, 0.27]; NO3Units=kgha; NH4Units=ppm; SWUnits=Volumetric; OCUnits=Total; PHUnits=Water
        Simulation Rainshelter
          Clock: StartDate=1998-09-28; EndDate=1999-04-01
          Summary summaryfile
          Weather: FileName=%root%\Examples\WeatherFiles\lincoln.met
          SoilArbitrator Soil Arbitrator
          Zone paddock: Area=1; Slope=0
            Soil: SoilType=NZ_sedementary; Region=Plains; State=Canterbury; Country=New Zealnd; Latitude=0; Longitude=0
              Analysis: Thickness=[100, 200, 300, 300, 300, 300]; PH=[6.6, 6.2, 5.7, 5.5, 5.5, 5.5]; PHUnits=Water; BoronUnits=HotWater
              Water
                Thickness  BD     AirDry  LL15   DUL   SAT    KS
                200        1.311  0.05    0.1    0.25  0.419  4832.039
                200        1.524  0.1     0.1    0.33  0.405  389.229
                200        1.65   0.149   0.149  0.27  0.342  16.362
                200        1.601  0.14    0.14   0.22  0.322  97.995
                200        1.601  0.15    0.15   0.2   0.348  97.995
                200        1.601  0.149   0.149  0.25  0.342  97.995
                200        1.601  0.1     0.1    0.19  0.307  97.995
                200        1.601  0.06    0.06   0.17  0.309  97.995
                400        1.6    0.06    0.06   0.17  0.309  97.995
                SoilCrop OatsSoil: LL=[0.1, 0.1, 0.149, 0.14, 0.15, 0.149, 0.1, 0.06, 0.06]; KL=[0.06, 0.05, 0.04, 0.06, 0.05, 0.02, 0.02, 0.02, 0.02]; XF=[1, 0.2, 1, 1, 1, 1, 1, 1, 1]
              SoilWater: SummerDate=1-Nov; SummerU=6; SummerCona=2; WinterDate=1-Apr; WinterU=9; WinterCona=4.4; DiffusConst=0; DiffusSlope=0; Salb=0.18; CN2Bare=68; CNRed=20; CNCov=0.8; slope=0; discharge_width=0; catchment_area=0; max_pond=0; residueinterception=0
                Thickness  SWCON  KLAT
                200        0.7    0
                200        0.7    0
                200        0.95   0
                200        0.95   0
                200        0.95   0
                200        0.95   0
                200        0.95   0
                200        0.95   0
                400        0.95   0
              SoilNitrogen: fom_type=[default, manure, mucuna, lablab, shemp, stable]; fract_carb=[0.2, 0.3, 0.54, 0.57, 0.45, 0]; fract_cell=[0.7, 0.3, 0.37, 0.37, 0.47, 0.1]; fract_lign=[0.1, 0.4, 0.09, 0.06, 0.08, 0.9]
              SoilOrganicMatter: RootCN=40; RootWt=1000; SoilCN=11; EnrACoeff=7.4; EnrBCoeff=0.2; OCUnits=Total
                Thickness  OC     FBiom  FInert
                180        2.625  0.033  0.437
                150        1.247  0.019  0.657
                400        0.316  0.012  0.85
                270        0.208  0.01   0.945
                500        0.2    0.01   0.983
              Sample Initial nitrogen: NO3Units=ppm; NH4Units=ppm; SWUnits=Volumetric; OCUnits=Total; PHUnits=Water
                Thickness  NO3      NH4
                200        202.213  3
                200        4.921    2
                200        4.545    1
                200        3.123    1
                200        1.562    1
                200        1.562    1
                200        1.562    1
                200        1.562    1
              Sample Initial water: Thickness=[200, 200, 200, 200, 200, 200, 200, 200]; SW=[0.31, 0.31, 0.16, 0.15, 0.1, 0.1, 0.11, 0.12]; NO3Units=kgha; NH4Units=ppm; SWUnits=Volumetric; OCUnits=Total; PHUnits=Water
              CERESSoilTemperature
            SoluteManager
            MicroClimate: a_interception=0; b_interception=1; c_interception=0; d_interception=0; soil_albedo=0.3; sun_angle=15; soil_heat_flux_fraction=0.4; night_interception_fraction=0.5; refheight=2; albedo=0.293662; emissivity=0.96; RadIntTotal=0
            Fertiliser
            SurfaceOrganicMatter Surface Organic Matter: PoolName=wheat_stubble; type=wheat; mass=0; standing_fraction=0; cnr=80; CriticalResidueWeight=2000; OptimumDecompTemp=20; MaxCumulativeEOS=20; CNRatioDecompCoeff=0.277; CNRatioDecompThreshold=25; TotalLeachRain=25; MinRainToLeach=10; CriticalMinimumOrganicC=0.004; DefaultCPRatio=0; DefaultStandingFraction=0; StandingExtinctCoeff=0.5; FractionFaecesAdded=0.5
              Pools:
                {PoolName=wheat_stubble, ResidueType=wheat, Mass=0, CNRatio=80, StandingFraction=0}
              ResidueTypes: LoadFromResource=ResidueTypes
            Irrigation
            Plant Oats: CropType=Oats
            Manager ClimateControl
              StartDate = 1998-10-17
              EndDate = 1999-04-01
```csharp
using System;
using Models.Core;
using APSIM.Shared.Utilities;



using System.Collections.Generic;
using System.Text;
using Models.PMF;
using Models;
using System.Xml.Serialization;

namespace Models
{
    [Serializable] 
    [System.Xml.Serialization.XmlInclude(typeof(Model))]
    public class Script : Model
    {
        [Link] Weather Met;
        [Link] Clock Clock;
    
        [Description("Start Date")]
        public DateTime StartDate { get; set; }
        
        [Description("End Date")]
        public DateTime EndDate { get; set; }
 
    
        [EventSubscribe("PreparingNewWeatherData")]
        private void OnPreparingNewWeatherData(object sender, EventArgs e)
        {
            if ((Clock.Today.Date >= StartDate) && (Clock.Today.Date <= EndDate))
                Met.Rain = 0;        
        }
    }
}
```
            Folder Manager folder
              Operations
                1998-09-29  [Oats].Sow(population:300, cultivar:"Drummond", depth:30, rowSpacing:130);
              Operations Irrig
                1998-11-09  [Irrigation].Apply(35.3);
                1998-11-16  [Irrigation].Apply(45);
                1998-11-23  [Irrigation].Apply(44);
                1998-11-30  [Irrigation].Apply(30.1);
                1998-12-07  [Irrigation].Apply(41.6);
                1998-12-14  [Irrigation].Apply(55);
                1998-12-21  [Irrigation].Apply(50);
                1998-12-28  [Irrigation].Apply(55);
                1999-01-05  [Irrigation].Apply(53);
                1999-01-11  [Irrigation].Apply(50.4);
                1999-01-18  [Irrigation].Apply(49);
                1999-01-25  [Irrigation].Apply(49);
                1999-02-01  [Irrigation].Apply(51.2);
                1999-02-08  [Irrigation].Apply(53);
                1999-02-15  [Irrigation].Apply(34);
                1999-02-22  [Irrigation].Apply(37);
                1999-03-01  [Irrigation].Apply(24);
              Manager LeafSize
```csharp
using System;
using Models.Core;
using System.Collections.Generic;
using System.Text;
using Models.Soils;
using Models.PMF;
using Models;
using System.Xml.Serialization;
using APSIM.Shared.Utilities;

namespace Models
{
    [Serializable] 
    public class Script : Model
    {
        [Link] Clock Clock;
        [Link] Plant Oats;
        [Link] Zone zone;
                    
        [XmlIgnore] public bool InitialDay { get; set; }
        
        [XmlIgnore] public double LeafExpandedPosition { get; set; }
        [XmlIgnore] public double LeafAppearedPosition { get; set; }
        [XmlIgnore] public double ExpandedLeafNoYesterday { get; set; }
        [XmlIgnore] public double AppearedLeafNoYesterday { get; set; }
        [XmlIgnore] public double MostRecentlyExpandedLeafSize { get; set; }
        [XmlIgnore] public double MostRecentlyAppearedLeafMaxSize { get; set; }
        
        [EventSubscribe("Commencing")]
        private void OnSimulationCommencing(object sender, EventArgs e)
        {
            InitialDay = true;
            LeafExpandedPosition = 0;
            LeafAppearedPosition = 0;
            ExpandedLeafNoYesterday = 0;
            AppearedLeafNoYesterday = 0;
            MostRecentlyExpandedLeafSize = 0;
            MostRecentlyAppearedLeafMaxSize = 0;
        }
        
        [EventSubscribe("DoManagement")]
        private void OnDoManagement(object sender, EventArgs e)
        {
            ExpandedLeafNoYesterday = Convert.ToDouble(zone.Get("Oats.Leaf.ExpandedCohortNo"));
            AppearedLeafNoYesterday = Convert.ToDouble(zone.Get("Oats.Leaf.AppearedCohortNo"));
        }
        
        [EventSubscribe("DoManagementCalculations")]
        private void OnDoManagementCalculations(object sender, EventArgs e)
        {
            if (Convert.ToDouble(zone.Get("Oats.Leaf.ExpandedCohortNo")) > ExpandedLeafNoYesterday)
            {
                LeafExpandedPosition = Convert.ToDouble(zone.Get("Oats.Leaf.ExpandedCohortNo"));
                MostRecentlyExpandedLeafSize = (double)zone.Get("Oats.Leaf.CohortSize[" + (int)LeafExpandedPosition + "]");
            }
            
            if (Convert.ToDouble(zone.Get("Oats.Leaf.AppearedCohortNo")) > AppearedLeafNoYesterday)
            {
                LeafAppearedPosition = Convert.ToDouble(zone.Get("Oats.Leaf.AppearedCohortNo"));
                MostRecentlyAppearedLeafMaxSize = (double)zone.Get("Oats.Leaf.CohortParameters.MaxArea.Value()");
            }
            
        }
    }
}
```
            Report DailyReport
            Report HarvestReport
            Report SupReport: EventNames=[Clock].DoReport
              VariableNames:
                [Clock].Today
                [Phenology].ThermalTime.Value()
                [Leaf].CohortSize
                [Leaf].CohortParameters.MaxArea.Value()
                [Oats].Arbitrator.DMAllocated
                [Oats].Arbitrator.DMDemand
                [Oats].Arbitrator.DMNutrientLimitation
                [Oats].Arbitrator.DMSinkLimitation
                [Oats].Arbitrator.DM.TotalFixationSupply
                [Oats].Arbitrator.FN
                [Oats].Arbitrator.NDemand
                [Oats].Structure.Phyllochron
                [Oats].Leaf.CohortMaxSize
                [Oats].Leaf.CohortParameters.GrowthDuration.Value()
                [Oats].Leaf.CohortParameters.LagDuration.Value()
                [Oats].Leaf.CohortParameters.SenescenceDuration.Value()
                [Oats].Leaf.CohortParameters.SpecificLeafAreaMax.Value()
                [Oats].Leaf.CohortParameters.SpecificLeafAreaMin.Value()
                [Oats].Leaf.Photosynthesis.FT.Value()
                [Oats].Leaf.Photosynthesis.FVPD.Value()
                [Oats].Leaf.Photosynthesis.RueAct
                [Oats].Stem.DMDemandFunction.HightLimitedDMAccumulation.Value()
                [Oats].Stem.DMDemandFunction.PotentialDMAccumulation.Value()
                [Oats].Leaf.NextExpandingLeafProportion
                [Oats].Structure.MeanTillerGrowthRate.Value()
                sum([Soil].SoilWater.SWmm[1:8]) as ProfileWater
                [LeafSize].Script.LeafAppearedPosition
                [LeafSize].Script.MostRecentlyAppearedLeafMaxSize
                [LeafSize].Script.LeafExpandedPosition
                [LeafSize].Script.MostRecentlyExpandedLeafSize
                [Grain].AccumThermalTime.Value()
                [Oats].Panicle.HeadNumber.Value()
                [Oats].Grain.NumberFunction.Value()
            Manager WaterTable
              WaterTableRate = 1600
```csharp
using System;
using Models.Core;
using System.Collections.Generic;
using System.Text;
using Models.Soils;
using Models.PMF;
using Models;
using System.Xml.Serialization;
using APSIM.Shared.Utilities;

namespace Models
{
    [Serializable] 
    public class Script : Model
    {
        [Link] Soil ThisSoil; 
                    
        [Description("WaterTable")]
        public double WaterTableRate { get; set; }

        [EventSubscribe("Commencing")]
        private void OnSimulationCommencing(object sender, EventArgs e)
        {
            ThisSoil.SoilWater.SetWaterTable(WaterTableRate);
        }
        
        [EventSubscribe("DoManagement")]
        private void OnDoManagement(object sender, EventArgs e)
        {
        ThisSoil.SoilWater.SetWaterTable(WaterTableRate);
        }
        
    }
}
```
      Experiment WinterSowing2015
        Memo
          FRNL Experiment  Brendom Malcom Agronomy 2016

          Grazing winter forage crops is an important management strategy for profitable livestock production in many New Zealand regions where there is commonly a pasture feed deficit during this period. However, the high stocking densities that are often associated with these systems can have negative environmental effects, such as nitrogen (N) leaching losses to groundwater. This field study investigated the potential biomass production and reduced risk of N leaching from establishing oats (Avena sativa L.) as a green-chop catch crop after winter-grazed forage kale (Brassica oleracea var. acephala L.) in Canterbury, New Zealand. Oat crops were direct-drilled on two sowing dates (early: 1 July 2015 and late: 1 August 2015) and were managed under high (400 kg N/ha) and low (0 kg N/ha) N load conditions, representing urine-patch and inter urine-patch areas. For the early-sown crops yields were 6.1 (low N) and 11.8 t DM/ha (high N) at final harvest (50% ear emergence) on 19 November 2015. For the late-sown crops yields were 6.7 (low N) and 10.1 t DM/ha (high N) at the same development stage (26 November 2015). By establishing oats as a catch crop in winter soil profile mineral-N (0-120 cm depth) was reduced by up to 86% (early) and 80% (late) in the high N (simulated urine-patch) treatments compared with the respective fallow treatment. These results indicated the technical feasibility of direct drilling oats as catch crops immediately after winter forage grazing, with likely production and environmental benefits such as the reduced risk of N leaching losses.
        Factors
          Factor Sow
            Factor July
              Specifications:
                [Operations]
                [Fertilise].Script.SDSwitch = 1.0
              Operations
                2015-07-01  [Oats].Sow(population:180, cultivar:"Milton", depth:40, rowSpacing:150);
            Factor Aug
              Specifications:
                [Operations]
                [Fertilise].Script.SDSwitch = 2.0
              Operations
                2015-08-01  [Oats].Sow(population:160, cultivar:"Milton", depth:40, rowSpacing:150);
          Factor Fert
            Factor 0: Specifications=[Fertilize]
              Operations Fertilize
                2015-06-01  [Fertiliser].Apply(0, Fertiliser.Types.UreaN, 10);
            Factor 400: Specifications=[Fertilize]
              Operations Fertilize
                2015-06-01  [Fertiliser].Apply(400, Fertiliser.Types.UreaN, 10);
        Simulation ABlock
          Clock: StartDate=2015-05-25; EndDate=2015-12-01
          Summary summaryfile
          Weather: FileName=%root%\Examples\WeatherFiles\lincoln.met
          SoilArbitrator Soil Arbitrator
          Zone paddock: Area=1; Slope=0
            Soil: Latitude=0; Longitude=0
              Analysis: Thickness=[100, 200, 300, 300, 300, 300]; PH=[6.6, 6.2, 5.7, 5.5, 5.5, 5.5]; PHUnits=Water; BoronUnits=HotWater
              Water
                Thickness  BD   AirDry  LL15  DUL   SAT
                200        1.2  0.15    0.15  0.32  0.46
                200        1.2  0.15    0.15  0.32  0.46
                200        1.2  0.15    0.15  0.3   0.4
                200        1.2  0.15    0.15  0.3   0.4
                200        1.2  0.15    0.15  0.3   0.4
                200        1.2  0.15    0.15  0.3   0.4
                200        1.2  0.15    0.15  0.3   0.4
                200        1.2  0.15    0.15  0.3   0.4
                SoilCrop WheatSoil: LL=[0.15, 0.15, 0.15, 0.15, 0.15, 0.15, 0.15, 0.15]; KL=[0.06, 0.06, 0.06, 0.06, 0.04, 0.025, 0.01, 0.005]; XF=[1, 1, 1, 1, 1, 1, 1, 1]
                SoilCrop OatsSoil: LL=[0.15, 0.15, 0.15, 0.15, 0.15, 0.15, 0.15, 0.15]; KL=[0.06, 0.06, 0.06, 0.06, 0.04, 0.025, 0.01, 0.005]; XF=[1, 1, 1, 1, 1, 1, 1, 1]
              SoilWater: SummerDate=1-Nov; SummerU=6; SummerCona=2; WinterDate=1-Apr; WinterU=9; WinterCona=4.4; DiffusConst=0; DiffusSlope=0; Salb=0.18; CN2Bare=68; CNRed=20; CNCov=0.8; slope=0; discharge_width=0; catchment_area=0; max_pond=0; residueinterception=0
                Thickness  SWCON  KLAT
                200        0.7    0
                200        0.7    0
                200        0.95   0
                200        0.95   0
                200        0.95   0
                200        0.95   0
                200        0.95   0
                200        0.95   0
              SoilNitrogen: fom_type=[default, manure, mucuna, lablab, shemp, stable]; fract_carb=[0.2, 0.3, 0.54, 0.57, 0.45, 0]; fract_cell=[0.7, 0.3, 0.37, 0.37, 0.47, 0.1]; fract_lign=[0.1, 0.4, 0.09, 0.06, 0.08, 0.9]
              SoilOrganicMatter: RootCN=30; RootWt=3000; SoilCN=11.5; EnrACoeff=7.4; EnrBCoeff=0.2; OCUnits=Total
                Thickness  OC    FBiom  FInert
                100        1.82  0.025  0.3
                200        1.47  0.025  0.4
                300        1.2   0.015  0.75
                300        1.03  0.01   0.9
                300        0.47  0.01   0.96
                300        0.47  0.01   0.96
              Sample Initial nitrogen: NO3Units=kgha; NH4Units=ppm; SWUnits=Volumetric; OCUnits=Total; PHUnits=Water
                Thickness  NO3  NH4
                100        20   0
                200        30   0
                300        5    0
                300        5    0
                300        0    0
                300        0    0
              Sample Initial water: Thickness=[200, 200, 200, 200, 200, 200, 200, 200]; SW=[0.29, 0.28, 0.16, 0.15, 0.1, 0.1, 0.11, 0.12]; NO3Units=kgha; NH4Units=ppm; SWUnits=Volumetric; OCUnits=Total; PHUnits=Water
              CERESSoilTemperature
            SoluteManager
            Irrigation
            SurfaceOrganicMatter Surface Organic Matter: same as Validation.New Zealand.RS_Oats_9899.Rainshelter.paddock.Surface Organic Matter
            Fertiliser
            MicroClimate: a_interception=0; b_interception=1; c_interception=0; d_interception=0; soil_albedo=0.3; sun_angle=15; soil_heat_flux_fraction=0.4; night_interception_fraction=0.5; refheight=2; albedo=0.293662; emissivity=0.96; RadIntTotal=0
            Plant Oats: CropType=Oats
            Folder Manager folder
              Operations
              Manager Fertilise
                FertDate1 = 05-Aug
                FertDate2 = 01-Oct
                FertDate3 = 20-Oct
                FertDate4 = 25-Nov
                Amount1 = 0
                Amount2 = 0
                Amount3 = 0
                Amount4 = 0
                SDSwitch = 0
```csharp
using System;
using Models.Core;
using Models.PMF;
using APSIM.Shared.Utilities;
namespace Models
{
    [Serializable]
    public class Script : Model
    {
        [Link] Clock Clock;
        [Link] Fertiliser Fertiliser;
        
        [Description("Date to fertilise")]
        public string FertDate1 { get; set; }
        [Description("Date to fertilise")]
        public string FertDate2 { get; set; }
        [Description("Date to fertilise")]
        public string FertDate3 { get; set; }
        [Description("Date to fertilise")]
        public string FertDate4 { get; set; }
        
        [Description("Amount of fertiliser to be applied (kg/ha)")]
        public double Amount1 { get; set; }
        [Description("Amount of fertiliser to be applied (kg/ha)")]
        public double Amount2 { get; set; }
        [Description("Amount of fertiliser to be applied (kg/ha)")]
        public double Amount3 { get; set; }
        [Description("Amount of fertiliser to be applied (kg/ha)")]
        public double Amount4 { get; set; }
        
        [Description("Amount of fertiliser to be applied (kg/ha)")]
        public double SDSwitch { get; set; }
        
        [EventSubscribe("DoManagement")]
        private void OnDoManagement(object sender, EventArgs e)
        {
            if (DateUtilities.WithinDates(FertDate1, Clock.Today, FertDate1))
                Fertiliser.Apply(Amount: Amount1 * SDSwitch, Type: Fertiliser.Types.NO3N);
            if (DateUtilities.WithinDates(FertDate2, Clock.Today, FertDate2))
                Fertiliser.Apply(Amount: Amount2, Type: Fertiliser.Types.NO3N);
            if (DateUtilities.WithinDates(FertDate3, Clock.Today, FertDate3))
                Fertiliser.Apply(Amount: Amount3, Type: Fertiliser.Types.NO3N);
            if (DateUtilities.WithinDates(FertDate4, Clock.Today, FertDate4))
                Fertiliser.Apply(Amount: Amount4 * SDSwitch, Type: Fertiliser.Types.NO3N);
        }
    }
}
```
              Operations Fertilize
                2015-06-01  [Fertiliser].Apply(0, Fertiliser.Types.UreaN, 10);
              Operations Irr
                2015-10-15  [Irrigation].Apply(25);
                2015-11-03  [Irrigation].Apply(25);
                2015-11-15  [Irrigation].Apply(25);
                2015-11-20  [Irrigation].Apply(30);
              Manager Harvesting
```csharp
using System;
using Models.Core;
using System.Collections.Generic;
using System.Text;
using Models.Soils;
using Models.PMF;
using Models;
using System.Xml.Serialization;
using APSIM.Shared.Utilities;

namespace Models
{
    [Serializable] 
    public class Script : Model
    {

    }
}
```
            Report DailyReport
            Report HarvestReport
            Report SupReport: EventNames=[Clock].DoReport
              VariableNames:
                [Clock].Today
                [Leaf].CohortSize
                [Oats].Arbitrator.DMAllocated
                [Oats].Arbitrator.DMDemand
                [Oats].Arbitrator.DMNutrientLimitation
                [Oats].Arbitrator.DMSinkLimitation
                [Oats].Arbitrator.DM.TotalFixationSupply
                [Oats].Arbitrator.FN
                [Oats].Arbitrator.NDemand
                [Oats].Leaf.CohortMaxSize
                [Oats].Leaf.CohortParameters.GrowthDuration.Value()
                [Oats].Leaf.CohortParameters.LagDuration.Value()
                [Oats].Leaf.CohortParameters.MaxArea.Value()
                [Oats].Leaf.CohortParameters.SenescenceDuration.Value()
                [Oats].Leaf.CohortParameters.SpecificLeafAreaMax.Value()
                [Oats].Leaf.CohortParameters.SpecificLeafAreaMin.Value()
                [Oats].Leaf.Photosynthesis.FT.Value()
                [Oats].Leaf.Photosynthesis.FVPD.Value()
                [Oats].Leaf.Photosynthesis.RueAct
                [Oats].Stem.DMDemandFunction.HightLimitedDMAccumulation.Value()
                [Oats].Stem.DMDemandFunction.PotentialDMAccumulation.Value()
                [Oats].Leaf.NextExpandingLeafProportion
                [Oats].Structure.MeanTillerGrowthRate.Value()
                sum([Soil].SoilWater.SWmm[1:8]) as ProfileWater
      Experiment WinterSowing2016
        Memo
          FRNL Experiment  Brendom Malcom Agronomy 2016

          Grazing winter forage crops is an important management strategy for profitable livestock production in many New Zealand regions where there is commonly a pasture feed deficit during this period. However, the high stocking densities that are often associated with these systems can have negative environmental effects, such as nitrogen (N) leaching losses to groundwater. This field study investigated the potential biomass production and reduced risk of N leaching from establishing oats (Avena sativa L.) as a green-chop catch crop after winter-grazed forage kale (Brassica oleracea var. acephala L.) in Canterbury, New Zealand. Oat crops were direct-drilled on two sowing dates (early: 1 July 2015 and late: 1 August 2015) and were managed under high (400 kg N/ha) and low (0 kg N/ha) N load conditions, representing urine-patch and inter urine-patch areas. For the early-sown crops yields were 6.1 (low N) and 11.8 t DM/ha (high N) at final harvest (50% ear emergence) on 19 November
          2015. For the late-sown crops yields were 6.7 (low N) and 10.1 t DM/ha (high N) at the same development stage (26 November 2015). By establishing oats as a catch crop in winter soil profile mineral-N (0-120 cm depth) was reduced by up to 86% (early) and 80% (late) in the high N (simulated urine-patch) treatments compared with the respective fallow treatment. These results indicated the technical feasibility of direct drilling oats as catch crops immediately after winter forage grazing, with likely production and environmental benefits such as the reduced risk of N leaching losses.
        Factors
          Factor Sow
            Factor July
              Specifications:
                [Operations]
                [Fertilise].Script.SDSwitch = 1.0
              Operations
                2016-07-05  [Oats].Sow(population:400, cultivar:"Milton", depth:40, rowSpacing:150);
            Factor Aug
              Specifications:
                [Operations]
                [Fertilise].Script.SDSwitch = 2.0
              Operations
                2016-07-29  [Oats].Sow(population:300, cultivar:"Milton", depth:40, rowSpacing:150);
          Factor Fert
            Factor 400: Specifications=[Fertilize]
              Operations Fertilize
                2015-06-01  [Fertiliser].Apply(400, Fertiliser.Types.UreaN, 10);
        Simulation RS2016
          Clock: StartDate=2016-05-25; EndDate=2016-12-01
          Summary summaryfile
          Weather: FileName=%root%\Examples\WeatherFiles\lincoln.met
          SoilArbitrator Soil Arbitrator
          Zone paddock: Area=1; Slope=0
            Soil: Latitude=0; Longitude=0
              Analysis: Thickness=[100, 200, 300, 300, 300, 300]; PH=[6.6, 6.2, 5.7, 5.5, 5.5, 5.5]; PHUnits=Water; BoronUnits=HotWater
              Water
                Thickness  BD   AirDry  LL15  DUL   SAT
                200        1.2  0.15    0.15  0.32  0.46
                200        1.2  0.15    0.15  0.32  0.46
                200        1.2  0.15    0.15  0.3   0.4
                200        1.2  0.15    0.15  0.3   0.4
                200        1.2  0.15    0.15  0.3   0.4
                200        1.2  0.15    0.15  0.3   0.4
                200        1.2  0.15    0.15  0.3   0.4
                200        1.2  0.15    0.15  0.3   0.4
                SoilCrop WheatSoil: LL=[0.15, 0.15, 0.15, 0.15, 0.15, 0.15, 0.15, 0.15]; KL=[0.06, 0.06, 0.06, 0.06, 0.04, 0.03, 0.01, 0.01]; XF=[1, 1, 1, 1, 1, 1, 1, 1]
                SoilCrop OatsSoil: LL=[0.15, 0.15, 0.15, 0.15, 0.15, 0.15, 0.15, 0.15]; KL=[0.06, 0.06, 0.06, 0.06, 0.04, 0.03, 0.01, 0.01]; XF=[1, 1, 1, 1, 1, 1, 1, 1]
              SoilWater: same as Validation.New Zealand.WinterSowing2015.ABlock.paddock.Soil.SoilWater
              SoilNitrogen: fom_type=[default, manure, mucuna, lablab, shemp, stable]; fract_carb=[0.2, 0.3, 0.54, 0.57, 0.45, 0]; fract_cell=[0.7, 0.3, 0.37, 0.37, 0.47, 0.1]; fract_lign=[0.1, 0.4, 0.09, 0.06, 0.08, 0.9]
              SoilOrganicMatter: same as Validation.New Zealand.WinterSowing2015.ABlock.paddock.Soil.SoilOrganicMatter
              Sample Initial nitrogen: NO3Units=kgha; NH4Units=ppm; SWUnits=Volumetric; OCUnits=Total; PHUnits=Water
                Thickness  NO3  NH4
                100        217  0
                200        30   0
                300        5    0
                300        5    0
                300        0    0
                300        0    0
              Sample Initial water: Thickness=[200, 200, 200, 200, 200, 200, 200, 200]; SW=[0.29, 0.28, 0.16, 0.15, 0.1, 0.1, 0.11, 0.12]; NO3Units=kgha; NH4Units=ppm; SWUnits=Volumetric; OCUnits=Total; PHUnits=Water
              CERESSoilTemperature
            SoluteManager
            Irrigation
            SurfaceOrganicMatter Surface Organic Matter: same as Validation.New Zealand.RS_Oats_9899.Rainshelter.paddock.Surface Organic Matter
            Fertiliser
            MicroClimate: a_interception=0; b_interception=1; c_interception=0; d_interception=0; soil_albedo=0.3; sun_angle=15; soil_heat_flux_fraction=0.4; night_interception_fraction=0.5; refheight=2; albedo=0.293662; emissivity=0.96; RadIntTotal=0
            Plant Oats: CropType=Oats
            Folder Manager folder
              Operations
              Manager Fertilise: same as Validation.New Zealand.WinterSowing2015.ABlock.paddock.Manager folder.Fertilise
              Operations Fertilize
                2015-06-01  [Fertiliser].Apply(0, Fertiliser.Types.UreaN, 10);
              Operations Irr
                2016-09-06  [Irrigation].Apply(25);
                2016-09-13  [Irrigation].Apply(28);
                2016-09-19  [Irrigation].Apply(25);
                2016-09-26  [Irrigation].Apply(25);
                2016-10-05  [Irrigation].Apply(30);
              Manager Harvesting
                script: same as in Validation.New Zealand.WinterSowing2015.ABlock.paddock.Manager folder.Harvesting
            Report DailyReport
            Report HarvestReport
      Experiment CPT
        Memo
          Jamieson, P. D. and C. A. Munro (1999). A simple method for the phenological evaluation of new cereal cultivars. Agronomy Society of New Zealand - Proceedings, Twenty-Ninth Annual Conference, 1999. J. G. Hampton and K. M. Pollock. 29: 63-68.

          This experiment is part of the ongoing Cultivar Prediction Trial at Plant & Food Lincoln wher a Cultivar is planted at 3 sowing dates throughout the year and the time of flowering, Final leaf number and Flag leaf are recorded.
        Factors
          Factor Sow
            Specifications=[Clock].StartDate = 2002-03-07,2002-05-15,2002-09-09,2003-03-14,2003-05-21,2003-09-02,2004-03-23,2004-05-28,2004-09-06
          Factor Cult: Specifications=[SowAndHarvest].Script.Cultivar = Hokonui,Stampede
        Simulation PaddockCPT
          Clock: StartDate=2002-03-01; EndDate=2010-02-01
          Summary summaryfile
          Weather: FileName=%root%\Examples\WeatherFiles\lincoln.met
          SoilArbitrator Soil Arbitrator
          Zone paddock: Area=1; Slope=0
            Soil: Latitude=0; Longitude=0
              Analysis: Thickness=[100, 200, 300, 300, 300, 300]; PH=[6.6, 6.2, 5.7, 5.5, 5.5, 5.5]; PHUnits=Water; BoronUnits=HotWater
              Water
                Thickness  BD   AirDry  LL15  DUL   SAT
                200        1.2  0.05    0.1   0.32  0.46
                200        1.2  0.1     0.1   0.32  0.46
                200        1.2  0.07    0.07  0.13  0.4
                200        1.2  0.07    0.07  0.1   0.3
                200        1.2  0.08    0.08  0.11  0.3
                200        1.2  0.07    0.07  0.1   0.3
                200        1.2  0.07    0.07  0.1   0.3
                200        1.2  0.07    0.07  0.1   0.3
                SoilCrop WheatSoil: LL=[0.1, 0.1, 0.07, 0.07, 0.08, 0.07, 0.07, 0.07]; KL=[0.06, 0.06, 0.06, 0.06, 0.04, 0.025, 0.01, 0.005]; XF=[1, 1, 1, 1, 1, 1, 1, 1]
                SoilCrop OatsSoil: LL=[0.1, 0.1, 0.07, 0.07, 0.08, 0.07, 0.07, 0.07]; KL=[0.06, 0.06, 0.06, 0.06, 0.04, 0.025, 0.01, 0.005]; XF=[1, 1, 1, 1, 1, 1, 1, 1]
              SoilWater: same as Validation.New Zealand.WinterSowing2015.ABlock.paddock.Soil.SoilWater
              SoilNitrogen: fom_type=[default, manure, mucuna, lablab, shemp, stable]; fract_carb=[0.2, 0.3, 0.54, 0.57, 0.45, 0]; fract_cell=[0.7, 0.3, 0.37, 0.37, 0.47, 0.1]; fract_lign=[0.1, 0.4, 0.09, 0.06, 0.08, 0.9]
              SoilOrganicMatter: same as Validation.New Zealand.WinterSowing2015.ABlock.paddock.Soil.SoilOrganicMatter
              Sample Initial nitrogen: NO3Units=kgha; NH4Units=ppm; SWUnits=Volumetric; OCUnits=Total; PHUnits=Water
                Thickness  NO3  NH4
                100        217  0
                200        30   0
                300        5    0
                300        5    0
                300        0    0
                300        0    0
              Sample Initial water: Thickness=[200, 200, 200, 200, 200, 200, 200, 200]; SW=[0.29, 0.28, 0.16, 0.15, 0.1, 0.1, 0.11, 0.12]; NO3Units=kgha; NH4Units=ppm; SWUnits=Volumetric; OCUnits=Total; PHUnits=Water
              CERESSoilTemperature
            SoluteManager
            Irrigation
            SurfaceOrganicMatter Surface Organic Matter: same as Validation.New Zealand.RS_Oats_9899.Rainshelter.paddock.Surface Organic Matter
            Fertiliser
            MicroClimate: a_interception=0; b_interception=1; c_interception=0; d_interception=0; soil_albedo=0.3; sun_angle=15; soil_heat_flux_fraction=0.4; night_interception_fraction=0.5; refheight=2; albedo=0.293662; emissivity=0.96; RadIntTotal=0
            Plant Oats: CropType=Oats
            Manager SowAndHarvest
              Cultivar = Otane
```csharp
using System;
using Models.Core;
using Models.PMF;
using APSIM.Shared.Utilities;
using System.Xml.Serialization;
        
namespace Models
{
    [Serializable] 
    [System.Xml.Serialization.XmlInclude(typeof(Model))]
    public class Script : Model
    {
        [Link] Plant Oats;
        [Link] Clock Clock;
        [Link] Simulation sim;
        [Link] Summary Summary;
        
        [Description("Cultivar")]
        public string Cultivar { get; set; }
        
        [XmlIgnore] public bool Sown { get; set; }
        [XmlIgnore] public bool Harvested { get; set; }
        [XmlIgnore] public bool EndSet { get; set; }
        
        [EventSubscribe("Commencing")]
        private void OnSimulationCommencing(object sender, EventArgs e)
        {
            Sown = false;
            Harvested = false;
            EndSet = false;
        }
        
        [EventSubscribe("DoManagement")]
        private void OnDoManagement(object sender, EventArgs e)
        {
            if (Sown == false)
            {
                Oats.Sow(population: 200, cultivar: Cultivar, depth: 15, rowSpacing: 150, budNumber: 1);
                Sown = true;
            }
            
            if (Oats.Phenology.CurrentPhaseName == "Maturing")
            {
                Oats.Harvest();
                Oats.EndCrop();
                Harvested = true;
                Summary.WriteMessage(this, "Maturity reached so setting end date to stop simulation");
            }
            
            if ((Harvested == true) && (EndSet == false))
            {
                sim.Set("Clock.EndDate", Clock.Today.AddDays(1));
                EndSet = true;
            }
        }
    }
}
```
            Report HarvestReport: EventNames=[Clock].EndOfSimulation
              VariableNames:
                [Oats].Structure.LeafTipsAppeared
                [Oats].Structure.FinalLeafNumber
                [Oats].Phenology.FlagLeafDAS
                [Oats].Phenology.FloweringDAS
                [Oats].Phenology.MaturityDAS
      Experiment RS_Oats_1718
        Memo Experiment Description
          #Experiment description

          ## Introduction
          This is a simulation of Oats in a crop rotation consisting of a forage species, fodder beet, grown over spring/summer and harvested in autumn, followed by the catch crop, oats. The actual experiment was done in two parts in the rain shelter facility of Plant and Food Research, Lincoln, NZ.  The experiments were designed to help develop the model for the respective plants and here they are used to further demonstrate that ApsimX can simulate water and nitrogen cycling in the field and then to examine whether catch crops are a good option for mitigating N leaching from forages.

           Part 1: Co-limitation of water and nitrogen on fodder beet physiology
           - Irrigation: 2 treatments, nil or full irrigation (to match PET)
           - Nitrogen: 3 treatments, 0 kg N/ha, 50 kg N/ha & 300 kg N/ha applied as dissolved urea with fertigator
            - 25 or 100 kg N/ha applied after emergence
            - 25 or 100 kg N/ha applied when canopy nearly reached full cover
            - 100 kg N/ha applied a month after full cover

           Part 2: Ability of oats to act as catch-crops over winter/spring
           - Irrigation: 2 treatments, low (enough to keep plants growing) or full irrigation (to match PET)
           - Nitrogen: 3 treatments, 80 kg N/ha, 125 kg N/ha & 320 kg N/ha at sowing (residual plus urea applied at sowing)

          ## Management
          Pre-experiment actions:
            23/08/2016 - Oats harvested
            02/09/2016 - Site irrigated with 25mm
            05/09/2016 - Site ploughed
            06/09/2016 - Site cambridge rolled
            17/10/2016 - Site power harrowed
            17/10/2016 - Rainshelter was rolled in
            18/10/2016 - Fertiliser application (200kg/ha of KCl, 250kg/ha of Triple Super, 200kg/ha of NaCl and 30kg/ha of Boronate 15%)
            18/10/2016 - Site cambridge rolled and harrowed

          Experiment:
           1) Fodder beet:
               - Cultivar: Rivage
               - Sowing density: 11 plants/m2
                    row spacing: 45 cm
                          depth: 15 mm

              General actions:
                  18/10/2016 - Sowing
                  25/10/2016 - Irrigation of 5mm to all plots
                  27/10/2016 - Plants started to emerge
                  28/10/2016 - Irrigation of 5mm to all plots
                  28/10/2016 - First fertiliser application, 25kgN/ha of urea_N to the 50kg/ha plots and 100kgN/ha o the 300kg/ha plots
                  23/11/2016 - Irrigation treatments started
                  18/01/2017 - Second fertiliser application, 25Nkg/ha of liquid urea_N to the 50kg/ha plots and 100kgN/ha to the 300kg/ha plots
                  15/02/2017 - Final fertiliser application, 100Nkg/ha of liquid urea_N to the 300kg/ha plots
                  17/05/2017 - Plots harvested

           Intercrop actions:
                  19/05/2017 - All crop residues removed
                  25/05/2017 - Dryland plots irrigated with 100mm, over two days
                  29/05/2017 - Dryland 300N plot irrigated with 64.0mm
                  30/05/2017 - Dryland 0N and 50N plots irrigated with 30.3 and 51.0mm
                  22/06/2017 - Site topped with maxitell
                  30/06/2017 - Site cambridge rolled
                  30/06/2017 - Rainshelter was rolled off (but it was put on in a few occasions)

           2) Oats:
               - Cultivar: Milton
               - Sowing density: 300 plants/m2
                    row spacing: 15 cm
                          depth: 45 mm

              General actions:
                  05/07/2017 - Sowing
                  05/07/2017 - Fertiliser application (400kg/ha Potash, Urea: treat4=40kgN/ha, treat5=85kgN/ha, treat6=270kgN/ha)
                  24/07/2017 - Plants started to emerge
                  11/09/2017 - Irrigation started in treatements 4, 5, and 6
                  06/11/2017 - Irrigation extended to all plots
                  04-09/01/2018 - Plots harvested
        Factors
          Factor Nit
            Factor 0
              Specifications:
                [FertiliserSchedule]
                [TreatmentSpecificActions].Script.NitFactor = 0
              Operations 0
            Factor 50
              Specifications:
                [FertiliserSchedule]
                [TreatmentSpecificActions].Script.NitFactor = 50
              Operations 50
                2016-10-29  [Fertiliser].Apply(25, Fertiliser.Types.UreaN, 10);
                2017-01-18  [Fertiliser].Apply(25, Fertiliser.Types.UreaN, 10);
            Factor 300
              Specifications:
                [FertiliserSchedule]
                [TreatmentSpecificActions].Script.NitFactor = 300
              Operations 300
                2016-10-29  [Fertiliser].Apply(100, Fertiliser.Types.UreaN, 10);
                2017-01-18  [Fertiliser].Apply(100, Fertiliser.Types.UreaN, 10);
                2017-02-25  [Fertiliser].Apply(100, Fertiliser.Types.UreaN, 10);
          Factor Irr
            Factor Full
              Specifications:
                [IrrigationSchedule]
                [TreatmentSpecificActions].Script.IrrFactor = true
              Operations Full
                2016-11-23  [Irrigation].Apply(30.0)
                2016-11-30  [Irrigation].Apply(25.0)
                2016-12-07  [Irrigation].Apply(25.0)
                2016-12-21  [Irrigation].Apply(25.2)
                2016-12-29  [Irrigation].Apply(30.0)
                2017-01-04  [Irrigation].Apply(40.0)
                2017-01-11  [Irrigation].Apply(32.9)
                2017-01-18  [Irrigation].Apply(25.4)
                2017-01-25  [Irrigation].Apply(31.3)
                2017-02-08  [Irrigation].Apply(33.0)
                2017-02-15  [Irrigation].Apply(35.0)
                2017-02-22  [Irrigation].Apply(29.0)
                2017-03-08  [Irrigation].Apply(34.0)
                2017-03-22  [Irrigation].Apply(50.1)
                2017-04-12  [Irrigation].Apply(30.9)
                2017-04-27  [Irrigation].Apply(18.9)
                2017-09-11  [Irrigation].Apply(20.9)
                2017-09-12  [Irrigation].Apply(21.1)
                2017-09-13  [Irrigation].Apply(21.4)
                2017-10-10  [Irrigation].Apply(22.2)
                2017-10-11  [Irrigation].Apply(22.5)
                2017-10-12  [Irrigation].Apply(22.5)
                Memo
                  Have added an extra irrigation, on 22 Oct,

                  Data indcates water applied but no notes of it RFZ

                  In Statefactors have donethe irrigations for
                    17/12  21/1 19/11 14/1
            Factor Nil
              Specifications:
                [IrrigationSchedule]
                [TreatmentSpecificActions].Script.IrrFactor = false
              Operations Nil
                Memo
                  Have added an extra irrigation, on 3 Nov,

                  Data indcates water applied but no notes of it RFZ
        Simulation Rainshelter2017
          Clock: StartDate=2017-06-01; EndDate=2018-01-15
          Summary summaryfile
          Weather: FileName=%root%\Examples\WeatherFiles\lincoln.met
          SoilArbitrator Soil Arbitrator
          Zone paddock: Area=1; Slope=0
            Folder Manager folder
              Operations GeneralIrrigation
                2017-11-06  [Irrigation].Apply(45.0)
                2017-11-15  [Irrigation].Apply(30.0)
                2017-11-22  [Irrigation].Apply(29.7)
                2017-11-29  [Irrigation].Apply(35.0)
                2017-12-06  [Irrigation].Apply(46.7)
              Operations IrrigationSchedule
              Operations FertiliserSchedule
              Operations SowingHarvesting
                2017-07-05  [Oats].Sow(population: 400, cultivar: "Milton", depth: 45, rowSpacing: 45)
                2018-01-10  [Oats].Harvest()
              Manager ClimateControl
                StartDate = 2016-10-17
                EndDate = 2017-06-30
                OtherDateString = 27/07/2017 28/07/2017 09/08/2017 13/08/2017 14/08/2017 31/08/2017
```csharp
using System;
using Models.Core;
using APSIM.Shared.Utilities;
using System.Collections.Generic;
using System.Text;
using Models.PMF;
using Models;
using System.Xml.Serialization;

// This script simulates a rainshelter, it controls the amount of rainfall (=0.0) and radiation (=95% of weather)
// It does that for a period between two dates, as well as at sporadic dates

namespace Models
{
    [Serializable] 
    [System.Xml.Serialization.XmlInclude(typeof(Model))]
    public class Script : Model
    {
        [Link] Weather Met;
        [Link] Clock Clock;
    
        [Description("Start date: ")]
        public DateTime StartDate { get; set; }
        [Description("End date: ")]
        public DateTime EndDate { get; set; }
         [Description("Other dates: ")]
         public string OtherDateString  { get; set; }

         private DateTime[] OtherDates;
         private double todaysRain;

        [EventSubscribe("Commencing")]
        private void OnSimulationCommencing(object sender, EventArgs e)
        {
            //gather the dates the variables will be controlled
            string[] auxDates = OtherDateString.Split(new Char []{' ',','});
            OtherDates = new DateTime[auxDates.Length];
            for (int i = 0; i < auxDates.Length; i++)
                OtherDates[i] = DateTime.Parse(auxDates[i]);
        }

        [EventSubscribe("PreparingNewWeatherData")]
        private void OnPreparingNewWeatherData(object sender, EventArgs e)
        {
            if ((Clock.Today.Date >= StartDate.Date) && (Clock.Today.Date <= EndDate.Date))
            {
                todaysRain = Met.Rain;
                changeMetData();
            }
            else
            {
                for (int i = 0; i < OtherDates.Length; i++)
                    if (Clock.Today.Date == OtherDates[0].Date)
                        changeMetData();
            }

            // rain shelter partial day cover
            if (Clock.Today.Date == DateTime.Parse("01/09/2017").Date)
                Met.Rain -= 2.0;
            
            // rain shelter cover removed for weekend
            if ((Clock.Today.Date == DateTime.Parse("03/06/2017").Date)||(Clock.Today.Date == DateTime.Parse("04/06/2017").Date))
            {
                Met.Rain = todaysRain;
                Met.Radn /= 0.95;
            }
        }

        private void changeMetData()
        {
            Met.Rain *= 0.0;
            Met.Radn *= 0.95;
        }
    }
}
```
              Manager TreatmentSpecificActions
                IrrFactor = False
                NitFactor = 0
```csharp
using System;
using Models.Core;
using System.Collections.Generic;
using System.Text;
using Models.Soils;
using Models.PMF;
using Models;
using System.Xml.Serialization;
using APSIM.Shared.Utilities;

// This script performs management actions that are not common to all treatments

namespace Models
{
    [Serializable] 
    public class Script : Model
    {
        [Link] Clock Clock;
        [Link] Irrigation Irrigation;
        [Link] Fertiliser Fert;
        [Link] Soil ThisSoil;
        [Link] SoluteManager soluteManager;

        [Description("Allow irrigation to be applied?")]
        public bool IrrFactor { get; set; }
        [Description("Amount of fertiliser to be applied (kg/ha)")]
        public double NitFactor { get; set; }


        private void SetSoilLayers()
        {
        
            int i = 0;

            if (ThisSoil.Thickness.Length != 7)
               throw new Exception("Soil layer exception");

            if ((IrrFactor == false) && (NitFactor == 300))
            {
                soluteManager.SetSolute("NH4",SoluteManager.SoluteSetterType.Fertiliser,new double[]{108,12,7,5,4,3,3});
                soluteManager.SetSolute("NO3",SoluteManager.SoluteSetterType.Fertiliser,new double[] {55,30,25,12,3,5,5});
            }   
            else if ((IrrFactor == false) && (NitFactor == 50))
            {
                soluteManager.SetSolute("NH4",SoluteManager.SoluteSetterType.Fertiliser,new double[]{14.2,3.6,3.2,1.0,2.8,3.7,3});
                soluteManager.SetSolute("NO3",SoluteManager.SoluteSetterType.Fertiliser,new double[] {34,16.8,15.8,7.7,1.8,2.3,5});
            }   
            else if ((IrrFactor == false) && (NitFactor == 0))
            {
                soluteManager.SetSolute("NH4",SoluteManager.SoluteSetterType.Fertiliser,new double[]{3.7,3.5,4.1,1.2,2.1,2.3,3});
                soluteManager.SetSolute("NO3",SoluteManager.SoluteSetterType.Fertiliser,new double[] {18,13.7,10.8,4.2,1.9,2.8,5});
            }   
            else if ((IrrFactor == true) && (NitFactor == 300))
            {
                soluteManager.SetSolute("NH4",SoluteManager.SoluteSetterType.Fertiliser,new double[]{1.8,1.8,3.0,2.3,2.4,1.8,3});
                soluteManager.SetSolute("NO3",SoluteManager.SoluteSetterType.Fertiliser,new double[] {12.6,6.4,5.3,2.8,2.2,2.2,5});
            }   
            else if ((IrrFactor == true) && (NitFactor == 50))
            {
                soluteManager.SetSolute("NH4",SoluteManager.SoluteSetterType.Fertiliser,new double[]{1.9,1.5,3.5,2.0,2.6,1.8,3});
                soluteManager.SetSolute("NO3",SoluteManager.SoluteSetterType.Fertiliser,new double[] {8.5,5.4,1.9,1.5,1.8,2.7,5});
            }
            else if ((IrrFactor == true) && (NitFactor == 0))
            {
                soluteManager.SetSolute("NH4",SoluteManager.SoluteSetterType.Fertiliser,new double[]{2.5,2.4,3.1,3.4,5.6,2.5,3});
                soluteManager.SetSolute("NO3",SoluteManager.SoluteSetterType.Fertiliser,new double[] {5.6,3.9,1.3,1.0,1.3,2.2,5});
            }
        }

        [EventSubscribe("DoManagement")]
        private void OnDoManagement(object sender, EventArgs e)
        {

            if (Clock.Today.Date == DateTime.Parse("02-Jun-2017"))
               SetSoilLayers();

        
            // Oats - Irrigation on dryland plots only, after harvest
            if (IrrFactor == false)
            {
                if ((Clock.Today.Date == DateTime.Parse("25-May-2017")) || (Clock.Today.Date == DateTime.Parse("26-May-2017")))
                    Irrigation.Apply(50.0);

                if (Clock.Today.Date == DateTime.Parse("29-May-2017"))
                if (NitFactor == 300)
                    Irrigation.Apply(64.0);

                if (Clock.Today.Date == DateTime.Parse("30-May-2017"))
                {
                    if (NitFactor == 0)
                        Irrigation.Apply(30.3);
                    if (NitFactor == 50)
                        Irrigation.Apply(51.0);
                }
            }

            // Oats - Irrigation on all 300N plots plus dryland 50N plots
            if (Clock.Today.Date == DateTime.Parse("13-Dec-2017"))
            {
                if (NitFactor == 300)
                    Irrigation.Apply(50.0);
                if ((NitFactor == 50) && (IrrFactor == false))
                    Irrigation.Apply(50.0);
            }

            // Oats - Fertiliser for irrigated plots only, on sowing
            if (Clock.Today.Date == DateTime.Parse("05-Jul-2017"))
            if (IrrFactor == true)
            {
                if (NitFactor == 0)
                    Fert.Apply(40, Models.Fertiliser.Types.UreaN, 10);
                if (NitFactor == 50)
                    Fert.Apply(85, Models.Fertiliser.Types.UreaN, 10);
                if (NitFactor == 300)
                    Fert.Apply(270, Models.Fertiliser.Types.UreaN, 10);
            }
        }
    }
}
```
              Manager LeafSize: same as Validation.New Zealand.RS_Oats_9899.Rainshelter.paddock.Manager folder.LeafSize
            MicroClimate: a_interception=0; b_interception=1; c_interception=0; d_interception=0; soil_albedo=0.3; sun_angle=15; soil_heat_flux_fraction=0.4; night_interception_fraction=0.5; refheight=2; albedo=0.293662; emissivity=0.96; RadIntTotal=0
            Irrigation
            Fertiliser
            SurfaceOrganicMatter Surface Organic Matter: PoolName=oat_stubble; type=oats; mass=1000; standing_fraction=0.5; cnr=20; CriticalResidueWeight=2000; OptimumDecompTemp=20; MaxCumulativeEOS=20; CNRatioDecompCoeff=0.277; CNRatioDecompThreshold=25; TotalLeachRain=25; MinRainToLeach=10; CriticalMinimumOrganicC=0.004; DefaultCPRatio=0; DefaultStandingFraction=0; StandingExtinctCoeff=0.5; FractionFaecesAdded=0.5
              Pools:
                {PoolName=oat_stubble, ResidueType=oats, Mass=1000, CNRatio=20, StandingFraction=0.5}
              ResidueTypes: LoadFromResource=ResidueTypes
            SoluteManager
            Soil: SoilType=Silt loam over sand; LocalName=Templeton; Site=RainShelter; NearestTown=Lincoln; Region=Plains; State=Canterbury; Country=New Zealand; Latitude=37.15; Longitude=172.28
              Memo Info
                # Soil Profile Description

                Templeton Silt Loam over sand, Typic Immature Pallic soil

                 Horizon  Depth (cm) Description
                 Ah         0-28     Very dark grayish brown (10YR 3/2); silt loam; no stones; moderately developed fine to medium blocky structure
                 Bw(f)     28-55     Dark yellowish brown (10YR 4/4); silt loam; no stones; weakly developed coarse to very coarse blocky structure
                 Bw(g)     55-95     Olive brown (2.5Y 4/4); fine sandy loam; no stones; apedal massive
                 2BC(g)    95-145    Olive brown (2.5Y 4/4); loamy sand;no stones; apedal single-grain
                 3BCg     145-153    Light yellowish brown (2.5Y 6/3); silt loam; no stones; apedal massive
                 4BCg     153-200+   Light yellowish brown (2.5Y 6/3); medium sand; no stones; apedal single-grain
                 ** 2BC(g) horizon contains a band of massive silt loam material between 115-130 cm

                Sampling layers:
                Layer  Depth (cm)
                 1	  0-15
                 2	 15-30
                 3	 30-60
                 4	 60-90
                 5	 90-120
                 6	120-150
                 7	150-180 -- Only for water
              Analysis: PHUnits=Water; BoronUnits=HotWater
                Thickness  Rocks  PH   ParticleSizeSand  ParticleSizeSilt  ParticleSizeClay
                200        0      6.1  15.6              60.4              24
                150        0      6.1  12.1              65.9              22
                200        0      6    21.3              63.7              15
                150        0      6    9.6               69.4              21
                200        0      6    74.9              18.1              7
                150        0      6    47.2              39.8              13
                200        0      6    32                58                10
                250        0      6    7.4               74.6              18
                300        0      6    14.7              69.3              16
              Water
                Thickness  BD    AirDry  LL15  DUL   SAT    KS
                150        1.27  0.1     0.1   0.32  0.48   2911.1
                150        1.38  0.15    0.1   0.31  0.47   711.9
                300        1.39  0.08    0.08  0.32  0.475  442.9
                300        1.45  0.14    0.14  0.37  0.44   171.9
                300        1.41  0.14    0.14  0.35  0.467  1973.9
                300        1.49  0.12    0.12  0.34  0.437  1483.6
                300        1.49  0.07    0.07  0.2   0.437  944
                SoilCrop OatsSoil: LL=[0.1, 0.1, 0.08, 0.14, 0.14, 0.12, 0.07]; KL=[0.1, 0.1, 0.05, 0.04, 0.03, 0.01, 0]; XF=[1, 1, 1, 1, 1, 1, 1]
              SoilWater: SummerDate=1-Nov; SummerU=6; SummerCona=2; WinterDate=1-Apr; WinterU=9; WinterCona=4.4; DiffusConst=0; DiffusSlope=0; Salb=0.23; CN2Bare=50; CNRed=20; CNCov=0.8; slope=0; discharge_width=0; catchment_area=0; max_pond=0; Thickness=[200, 150, 200, 150, 200, 150, 200, 250, 300]; SWCON=[0.9, 0.6, 0.6, 0.6, 0.546, 0.569, 0.533, 0.464, 0.541]; residueinterception=0
              SoilNitrogen: fom_type=[default, manure, mucuna, lablab, shemp, stable]; fract_carb=[0.2, 0.3, 0.54, 0.57, 0.45, 0]; fract_cell=[0.7, 0.3, 0.37, 0.37, 0.47, 0.1]; fract_lign=[0.1, 0.4, 0.09, 0.06, 0.08, 0.9]
              SoilOrganicMatter: RootCN=40; RootWt=1000; SoilCN=11; EnrACoeff=7.4; EnrBCoeff=0.2; OCUnits=Total
                Thickness  OC    FBiom  FInert
                200        3.4   0.06   0.2
                150        1.8   0.04   0.3
                200        0.3   0.012  0.85
                150        0.32  0.01   0.945
                200        0.14  0.01   0.983
                150        0.21  0.01   0.98
                200        0.2   0.01   0.99
                250        0.2   0.01   0.99
                300        0.17  0.01   0.99
              Sample Initial Soil Settings: NO3Units=kgha; NH4Units=kgha; SWUnits=Volumetric; OCUnits=Total; PHUnits=Water
                Thickness  NO3   NH4  SW
                150        18.9  2    0.3
                150        17.7  2.3  0.244
                300        4.2   4.1  0.25
                300        4.8   1.1  0.25
                300        4.5   0.9  0.264
                300        3.9   1.1  0.256
                300        3     1    0.162
                Memo ReadThisIfInitialSoilNisOfInterest
                  Initial soil N varied from treatment to treatment depending on the irrigation and N treatment of the previous fodder beet trial.  These treatment specific initial N contents are set in a manager scrip called "TreatmentSpecificActions", over writing what is set in this node
              CERESSoilTemperature
            Plant Oats: CropType=Oats
            Report EnviroReport: EventNames=[Clock].DoReport
              VariableNames:
                [Clock].Today
                [Weather].MeanT
                [Weather].Radn
                [Weather].Rain
                [Irrigation].IrrigationApplied
                [Oats].WaterSupplyDemandRatio
                ([Oats].Leaf.Transpiration + [Soil].SoilWater.Es + [MicroClimate].interception) as ET
                [MicroClimate].interception as Interception
                [Soil].SoilWater.Es as Evaporation
                [Soil].SoilWater.Drainage as Drainage
                [Soil].SoilWater.Runoff as Runoff
                sum([Soil].SoilWater.SWmm) as TotalSoilWater
                sum([Soil].SoilNitrogen.MineralisedN) as MineralisedN
                [Fertiliser].NitrogenApplied as FertiliserN
                sum([Soil].SoilNitrogen.Denitrification) as DenitrifiedN
                ([Soil].SoilWater.LeachUrea+[Soil].SoilWater.LeachNH4+[Soil].SoilWater.LeachNO3) as NLeached
                [SurfaceOrganicMatter].N as TotalSurfOMN
                sum([Soil].SoilNitrogen.FOMN) as TotalFOMN
                sum([Soil].SoilNitrogen.MicrobialN) as TotalMicrobialN
                sum([Soil].SoilNitrogen.HumicN) as TotalHumicN
                (sum([Soil].SoilNitrogen.NH4) + sum([Soil].SoilNitrogen.NO3)) as TotalSoilN
                sum([Soil].SoilNitrogen.urea) as TotalUrea
                sum([Soil].SoilNitrogen.NH4) as TotalNH4
                sum([Soil].SoilNitrogen.NO3) as TotalNO3
                [Soil].SoilNitrogen.oc
            Report DailyReport: EventNames=[Clock].DoReport
              VariableNames:
                [Clock].Today
                [Weather].MeanT
                [Soil].SoilWater.SW
                [Soil].SoilWater.SWmm
                sum([Soil].SoilWater.SWmm) as ProfileWater
                [SurfaceOrganicMatter].Wt
                sum([Soil].SoilNitrogen.NO3) as TotalSoilNitrogen
                [Oats].AboveGround.N
                [Oats].AboveGround.Wt
                [Oats].AboveGroundLive.N
                [Oats].AboveGroundLive.Wt
                [Oats].AboveGroundDead.N
                [Oats].AboveGroundDead.Wt
                [Oats].Arbitrator.DMDemand
                [Oats].Arbitrator.DM.TotalFixationSupply
                [Oats].Ear.N
                [Oats].Ear.Nconc
                [Oats].Ear.Wt
                [Oats].Grain.N
                [Oats].Grain.NConc
                [Oats].Grain.Number
                [Oats].Grain.Size
                [Oats].Grain.Wt
                [Oats].Grain.Live.Wt
                [Oats].Leaf.AppearedCohortNo
                [Oats].Leaf.CoverDead
                [Oats].Leaf.CoverGreen
                [Oats].Leaf.CoverTotal
                [Oats].Leaf.Dead.N
                [Oats].Leaf.Dead.NConc
                [Oats].Leaf.Dead.Wt
                [Oats].Leaf.DeadCohortNo
                [Oats].Leaf.SenescingCohortNo
                [Oats].Leaf.ExpandedCohortNo
                [Oats].Leaf.Fn
                [Oats].Leaf.Fw
                [Oats].Leaf.Height
                [Oats].Leaf.InitialisedCohortNo
                [Oats].Leaf.LAI
                [Oats].Leaf.Live.N
                [Oats].Leaf.Live.NConc
                [Oats].Leaf.Live.Wt
                [Oats].Leaf.SpecificArea
                [Oats].Leaf.Transpiration
                [Oats].Phenology.CurrentPhaseName
                [Oats].Phenology.CurrentStageName
                [Oats].Phenology.DailyVernalisation.Value()
                [Oats].Phenology.MeanTemp.Value()
                [Oats].Phenology.Photoperiod.Value()
                [Oats].Phenology.Stage
                [Oats].Phenology.ThermalTime.Value()
                [Oats].Phenology.ThermalTime.Value()
                [Oats].Phenology.Vrn1.Value()
                [Oats].Phenology.Vrn2.Value()
                [Oats].Phenology.Vrn4.Value()
                [Oats].Phenology.Zadok.Stage
                [Oats].Root.Depth
                [Oats].Root.N
                [Oats].Root.Wt
                [Oats].Root.Nconc
                [Oats].Root.WaterUptake
                [Oats].Panicle.N
                [Oats].Panicle.NConc
                [Oats].Panicle.Wt
                [Oats].Panicle.Live.StorageWt
                [Oats].Stem.N
                [Oats].Stem.NConc
                [Oats].Stem.Wt
                [Oats].Stem.PercentWSC
                [Oats].Stem.Live.StorageWt
                [Oats].StemPlusPanicle.Wt
                [Oats].StemPlusPanicle.N
                [Oats].SowingData.Cultivar
                [Oats].Structure.HaunStage.Value()TerminalSpikelet.Value()
                [Oats].Structure.HaunStage.Value()
                [Oats].Structure.Height
                [Oats].Structure.LeafTipsAppeared
                [Oats].Structure.FinalLeafNumber.Value()
                [Oats].Structure.FinalLeafNumber.ValueToHold.PhotoPLeaves.Value()
                [Oats].Structure.MainStemPopn
                [Oats].Structure.MeanTillerGrowthRate.Value()
                [Oats].Structure.TotalStemPopn
                [Oats].Total.N
                [Oats].Total.Wt
                [SurfaceOrganicMatter].Wt
                ([Oats].Leaf.Transpiration + [Soil].SoilWater.Es + [MicroClimate].interception) as ET
                sum([Soil].SoilNitrogen.NO3) as TotalSoilNitrogen
                [Oats].Phenology.FlagLeafDAS
                [Oats].Phenology.FloweringDAS
                [Oats].Phenology.MaturityDAS
                [Oats].Phenology.PhotoPeriod
                [Oats].Phenology.PhotoPeriodDeltaFunction
                [Oats].Phenology.Stage
                [Oats].Phenology.SoilTemperatureFunction.Value()
            Report HarvestReport
            Report SupReport: EventNames=[Clock].DoReport
              VariableNames:
                [Clock].Today
                [Phenology].ThermalTime.Value()
                [Leaf].CohortSize
                [Leaf].CohortParameters.MaxArea.Value()
                [Oats].Arbitrator.DMAllocated
                [Oats].Arbitrator.DMDemand
                [Oats].Arbitrator.DMNutrientLimitation
                [Oats].Arbitrator.DMSinkLimitation
                [Oats].Arbitrator.DM.TotalFixationSupply
                [Oats].Arbitrator.FN
                [Oats].Arbitrator.NDemand
                [Oats].Structure.Phyllochron
                [Oats].Leaf.CohortMaxSize
                [Oats].Leaf.CohortParameters.GrowthDuration.Value()
                [Oats].Leaf.CohortParameters.LagDuration.Value()
                [Oats].Leaf.CohortParameters.SenescenceDuration.Value()
                [Oats].Leaf.CohortParameters.SpecificLeafAreaMax.Value()
                [Oats].Leaf.CohortParameters.SpecificLeafAreaMin.Value()
                [Oats].Leaf.Photosynthesis.FT.Value()
                [Oats].Leaf.Photosynthesis.FVPD.Value()
                [Oats].Leaf.Photosynthesis.RueAct
                [Oats].Stem.DMDemandFunction.HightLimitedDMAccumulation.Value()
                [Oats].Stem.DMDemandFunction.PotentialDMAccumulation.Value()
                [Oats].Leaf.NextExpandingLeafProportion
                [Oats].Structure.MeanTillerGrowthRate.Value()
                [LeafSize].Script.LeafAppearedPosition
                [LeafSize].Script.MostRecentlyAppearedLeafMaxSize
                [LeafSize].Script.LeafExpandedPosition
                [LeafSize].Script.MostRecentlyExpandedLeafSize
                [Grain].AccumThermalTime.Value()
                [Oats].Panicle.HeadNumber.Value()
                [Oats].Grain.NumberFunction.Value()
    Folder Australia
      Memo
        The Oats model construction for Australian varieties was based primarily around the experiment at Gatton in 2007. Supporting phenology data was collected at the Leslie Research Centre (LRC) and Wellcamp Research Station for northern varieties, data kindly supplied by Bruce Winter, Oats Breeder with DAFQ. The model was then extended to data sets at Roma in QLD, and also sites in South Australia (Tarlee, Pinery) where additional adjustments were made to the relevant varieties.

        The APSIM nextGen model is based on the original oats model that was constructed in 2007 and then published at the Australian Agronomy Conference in 2008 using data from Gatton, Tarlee and Pinery as per the citation below. However it is not identical as changes have been made that improve the accuracy of validation simulations, so simulations run under APSIM 7.9 and previous versions will give different predictions when run with APSIM NextGen.

        Peake A, Whitbread A, Davoren B, Braun J and Limpus, S. (2008). The development of a model in APSIM for the simulation of grazing oats and oaten hay. In: Global Issues, Paddock Action. Proceedings of the 14th ASA Conference, 21-25 September 2008, Adelaide, South Australia.
      Folder Gatton2007
        Folder Gatton2007early
          Experiment Gatton2007
            Memo Experiment Description
              This experiment comprised an early and late sowing date, but full growth and soil water data was only collected for the early sowing date. The late sowing date was comprised of observation plots for phenology data collection only.

              Extinction coefficient and 'kl' values were measured on the early sowing date in addition to partitioned biomass data. Note that the kl values measured and used to simulated this irrigated trial were high, and may not apply to many dryland situations. Other simulations in the Australian validation data sets used the traditional wheat kl values for dryland situations.
            Factors
              Factor Cv: Specifications=[Operations]
                Operations Coolibah
                  2007-05-24  [Oats].Sow(population:95, cultivar:"Coolibah", depth:20, rowSpacing:250);
                Operations Taipan
                  2007-05-24  [Oats].Sow(population:104, cultivar:"Taipan", depth:20, rowSpacing:250);
            Simulation Gatton2007Base
              Clock: StartDate=2007-05-01; EndDate=2007-11-30
              Summary summaryfile
              Weather: FileName=Hybrid Gatton07 metfile.met
              SoilArbitrator Soil Arbitrator
              Zone paddock: Area=1; Slope=0
                Soil: Latitude=0; Longitude=0
                  Water
                    Thickness  BD    AirDry  LL15  DUL    SAT
                    150        1.37  0.11    0.15  0.394  0.445
                    150        1.29  0.15    0.19  0.325  0.45
                    300        1.4   0.18    0.22  0.432  0.47
                    300        1.47  0.19    0.22  0.363  0.43
                    300        1.37  0.19    0.22  0.34   0.43
                    SoilCrop OatsSoil: LL=[0.21, 0.2, 0.29, 0.295, 0.24]; KL=[0.15, 0.13, 0.07, 0.03, 0.03]; XF=[1, 1, 1, 1, 1]
                  SoilWater: SummerDate=1-Nov; SummerU=5; SummerCona=3; WinterDate=1-Apr; WinterU=5; WinterCona=3; DiffusConst=40; DiffusSlope=16; Salb=0.13; CN2Bare=78; CNRed=20; CNCov=0.8; max_pond=0; Thickness=[150, 150, 300, 300, 300, 300, 300]; SWCON=[0.5, 0.5, 0.5, 0.5, 0.5, 0.5, 0.5]; residueinterception=0
                  SoilNitrogen: fom_type=[default, manure, mucuna, lablab, shemp, stable]; fract_carb=[0.2, 0.3, 0.54, 0.57, 0.45, 0]; fract_cell=[0.7, 0.3, 0.37, 0.37, 0.47, 0.1]; fract_lign=[0.1, 0.4, 0.09, 0.06, 0.08, 0.9]
                  SoilOrganicMatter: RootCN=20; RootWt=500; SoilCN=14.5; EnrACoeff=7.4; EnrBCoeff=0.2; OCUnits=Total
                    Thickness  OC    FBiom  FInert
                    150        1.65  0.035  0.45
                    150        1.13  0.02   0.55
                    300        0.68  0.015  0.8
                    300        0.48  0.01   0.99
                    300        0.3   0.01   0.99
                    300        0.39  0.01   0.99
                    300        0.36  0.01   0.99
                  Analysis: Thickness=[150, 150, 300, 300, 300, 300, 300]; PH=[7.3, 7.1, 7.1, 7.1, 7.4, 7.8, 7.9]; PHUnits=Water; BoronUnits=HotWater
                  Sample Initial nitrogen: NO3Units=ppm; NH4Units=ppm; SWUnits=Volumetric; OCUnits=Total; PHUnits=Water
                    Thickness  NO3      NH4
                    150        22.6     0.300063
                    150        5.50005  0.300063
                    300        1.30001  0.300063
                    300        0        0
                    300        0        0
                    300        0        0
                    300        0        0
                  Sample Initial water: Thickness=[150, 150, 300, 300, 300, 300, 300]; SW=[0.26, 0.33, 0.35, 0.33, 0.26, 0.27, 0.3]; NO3Units=ppm; NH4Units=ppm; SWUnits=Volumetric; OCUnits=Total; PHUnits=Water
                  CERESSoilTemperature
                SoluteManager
                Irrigation
                SurfaceOrganicMatter Surface Organic Matter: same as Validation.New Zealand.RS_Oats_9899.Rainshelter.paddock.Surface Organic Matter
                Fertiliser
                MicroClimate: a_interception=0; b_interception=1; c_interception=0; d_interception=0; soil_albedo=0.3; sun_angle=15; soil_heat_flux_fraction=0.4; night_interception_fraction=0.5; refheight=2; albedo=0.293662; emissivity=0.96; RadIntTotal=0
                Plant Oats: CropType=Oats
                Folder Management
                  Operations IrrigandFert
                    2007-05-18  [Irrigation].Apply(140);
                    2007-05-31  [Irrigation].Apply(15);
                    2007-07-12  [Irrigation].Apply(15);
                    2007-07-24  [Irrigation].Apply(29);
                    2007-08-14  [Irrigation].Apply(45);
                    2007-05-14  [Fertiliser].Apply(150, Fertiliser.Types.UreaN, 40);
                    2007-07-23  [Fertiliser].Apply(90, Fertiliser.Types.UreaN, 10);
                    2007-08-13  [Fertiliser].Apply(110, Fertiliser.Types.UreaN, 10);
                    Memo
                      Additional N added to create non limiting as test. Urea first application now 300
                  Operations
                  Manager Harvesting
                    script: same as in Validation.New Zealand.WinterSowing2015.ABlock.paddock.Manager folder.Harvesting
                Report DailyReport
                Report HarvestReport
                Report SupReport: EventNames=[Clock].DoReport
                  VariableNames:
                    [Clock].Today
                    [Phenology].ThermalTime.Value()
                    [Leaf].CohortSize
                    [Leaf].CohortParameters.MaxArea.Value()
                    [Oats].Arbitrator.DMAllocated
                    [Oats].Arbitrator.DMDemand
                    [Oats].Arbitrator.DMNutrientLimitation
                    [Oats].Arbitrator.DMSinkLimitation
                    [Oats].Arbitrator.DM.TotalFixationSupply
                    [Oats].Arbitrator.FN
                    [Oats].Arbitrator.NDemand
                    [Oats].Structure.Phyllochron
                    [Oats].Leaf.CohortMaxSize
                    [Oats].Leaf.CohortParameters.GrowthDuration.Value()
                    [Oats].Leaf.CohortParameters.LagDuration.Value()
                    [Oats].Leaf.CohortParameters.SenescenceDuration.Value()
                    [Oats].Leaf.CohortParameters.SpecificLeafAreaMax.Value()
                    [Oats].Leaf.CohortParameters.SpecificLeafAreaMin.Value()
                    [Oats].Leaf.Photosynthesis.FT.Value()
                    [Oats].Leaf.Photosynthesis.FVPD.Value()
                    [Oats].Leaf.Photosynthesis.RueAct
                    [Oats].Stem.DMDemandFunction.HightLimitedDMAccumulation.Value()
                    [Oats].Stem.DMDemandFunction.PotentialDMAccumulation.Value()
                    [Oats].Leaf.NextExpandingLeafProportion
                    [Oats].Structure.MeanTillerGrowthRate.Value()
                    sum([Soil].SoilWater.SWmm[1:5]) as ProfileWater
          Memo Leaf Rust after anthesis
            Field notes recorded leaf rust becoming severe in Coolibah on 12/9/07 - no biomass cuts were taken after this
        Folder Gatton2007LATEsown
          Experiment Gatton2007Late
            Memo Experiment Description
              The late sown experiment at Gatton in 2007 was comprised of observation plots of the two varieties used in the early sowing date. 4 plants were monitored for phenology (Leaf Appearance Rate and Zadoks stage) from each observation plot.
            Factors
              Factor Cv: Specifications=[Operations]
                Operations CoolibahLate
                  2007-06-22  [Oats].Sow(population:95, cultivar:"Coolibah", depth:20, rowSpacing:250);
                Operations TaipanLate
                  2007-06-22  [Oats].Sow(population:104, cultivar:"Taipan", depth:20, rowSpacing:250);
            Simulation Gatton2007BaseLate: same as Validation.Australia.Gatton2007.Gatton2007early.Gatton2007.Gatton2007Base
      Folder Wellcamp2006
        Memo
          This experiment was run at DPI Wellcamp Research Station, Queensland in 2006.
          Phenology data (Zadok stage) was the only data collected.
        Experiment Wellcamp2006
          Memo Experiment Description
            This experiment was a phenology experiment based on small and narrow observation plots (4 rows) in conjunction with a QDAF Oats breeing trial. The decision was taken to use a nearby SILO met-data set rather than the onsite weather station, due to the possibility that the onsite met station had not been calibrated for some time.
          Factors
            Factor Cv: Specifications=[Sowing]
              Operations Coolibah
                2006-04-03  [Oats].Sow(population:100, cultivar:"Coolibah", depth:30, rowSpacing:250);
              Operations Taipan
                2006-04-03  [Oats].Sow(population:100, cultivar:"Taipan", depth:30, rowSpacing:250);
              Operations Algerian
                2006-04-03  [Oats].Sow(population:100, cultivar:"Algerian", depth:30, rowSpacing:250);
              Operations Nugene
                2006-04-03  [Oats].Sow(population:100, cultivar:"Nugene", depth:30, rowSpacing:250);
              Operations Drover
                2006-04-03  [Oats].Sow(population:100, cultivar:"Drover", depth:30, rowSpacing:250);
            Factor Cut: Specifications=[Cutting]
              Manager None
```csharp
using System;
using System.Collections.Generic;
using Models.Core;
using Models.PMF;
using Models.PMF.Interfaces;
using System.Xml.Serialization;

namespace Models
{
    [Serializable] 
    [System.Xml.Serialization.XmlInclude(typeof(Model))]
    public class Script : Model
    {
        
    }
}
```
              Manager One
                CutDate = 2006-08-10
```csharp
using System;
using System.Collections.Generic;
using Models.Core;
using Models.PMF;
using Models.PMF.Interfaces;
using System.Xml.Serialization;

namespace Models
{
    [Serializable] 
    [System.Xml.Serialization.XmlInclude(typeof(Model))]
    public class Script : Model
    {
        [Link] Plant Oats;
        [Link] Clock Clock;

        [Description("Cut Date")]
        public DateTime CutDate { get; set; }

        [XmlIgnore] private RemovalFractions Remove { get; set; }
        
        [EventSubscribe("Commencing")]
        private void OnSimulationCommencing(object sender, EventArgs e)
        {
            Remove = new RemovalFractions();
        }
        
        [EventSubscribe("DoManagement")]
        private void OnDoManagement(object sender, EventArgs e)
        {
            //Set up  array of remove fractions to send with Cut method.  Each member in the array corresponds to an organ in the same order they are set up in.
            if (Clock.Today.Date == CutDate)
            {
                //Remove.SetPhenologyStage = 3.5;
                Remove.SetFractionToRemove("Panicle", 1.0);
                Remove.SetFractionToResidue("Panicle", 0.0);
                Remove.SetFractionToRemove("Leaf", 0.8);
                Remove.SetFractionToResidue("Leaf", 0.0);
                Remove.SetFractionToRemove("Stem", 0.8);
                Remove.SetFractionToResidue("Stem", 0.0);
                Remove.SetFractionToRemove("Grain", 1.0);
                Remove.SetFractionToResidue("Grain", 0.0);
                Remove.SetFractionToRemove("Root", 0.0);
                Remove.SetFractionToResidue("Root", 0.0);
                Oats.RemoveBiomass("Cut", Remove);
            }
        }
    }
}
```
              Manager Two
                CutDate1 = 2006-08-10
                CutDate2 = 2006-09-04
```csharp
using System;
using System.Collections.Generic;
using Models.Core;
using Models.PMF;
using Models.PMF.Interfaces;
using System.Xml.Serialization;

namespace Models
{
    [Serializable] 
    [System.Xml.Serialization.XmlInclude(typeof(Model))]
    public class Script : Model
    {
        [Link] Plant Oats;
        [Link] Clock Clock;

        [Description("Cut Date1")]
        public DateTime CutDate1 { get; set; }
        [Description("Cut Date2")]
        public DateTime CutDate2 { get; set; }

        [XmlIgnore] private RemovalFractions Remove { get; set; }
        
        [EventSubscribe("Commencing")]
        private void OnSimulationCommencing(object sender, EventArgs e)
        {
            Remove = new RemovalFractions();
        }
        
        [EventSubscribe("DoManagement")]
        private void OnDoManagement(object sender, EventArgs e)
        {
            //Set up  array of remove fractions to send with Cut method.  Each member in the array corresponds to an organ in the same order they are set up in.
            if (Clock.Today.Date == CutDate1)
            {
                //Remove.SetPhenologyStage = 3.5;
                Remove.SetFractionToRemove("Panicle", 1.0);
                Remove.SetFractionToResidue("Panicle", 0.0);
                Remove.SetFractionToRemove("Leaf", 0.8);
                Remove.SetFractionToResidue("Leaf", 0.0);
                Remove.SetFractionToRemove("Stem", 0.8);
                Remove.SetFractionToResidue("Stem", 0.0);
                Remove.SetFractionToRemove("Grain", 1.0);
                Remove.SetFractionToResidue("Grain", 0.0);
                Remove.SetFractionToRemove("Root", 0.0);
                Remove.SetFractionToResidue("Root", 0.0);
                Oats.RemoveBiomass("Cut", Remove);
            }
            if (Clock.Today.Date == CutDate2)
            {
                //Remove.SetPhenologyStage = 3.5;
                Remove.SetFractionToRemove("Panicle", 1.0);
                Remove.SetFractionToResidue("Panicle", 0.0);
                Remove.SetFractionToRemove("Leaf", 0.8);
                Remove.SetFractionToResidue("Leaf", 0.0);
                Remove.SetFractionToRemove("Stem", 0.8);
                Remove.SetFractionToResidue("Stem", 0.0);
                Remove.SetFractionToRemove("Grain", 1.0);
                Remove.SetFractionToResidue("Grain", 0.0);
                Remove.SetFractionToRemove("Root", 0.0);
                Remove.SetFractionToResidue("Root", 0.0);
                Oats.RemoveBiomass("Cut", Remove);
            }
        }
    }
}
```
          Simulation Wellcamp2006Base
            Clock: StartDate=2006-02-25; EndDate=2006-11-02
            Summary summaryfile
            Weather: FileName=cotswald hills moyola 2006.met
            SoilArbitrator Soil Arbitrator
            Zone paddock: Area=1; Slope=0
              Soil: Latitude=0; Longitude=0
                Water
                  Thickness  BD    AirDry  LL15  DUL   SAT
                  150        0.9   0.11    0.22  0.52  0.59
                  150        1.01  0.306   0.34  0.53  0.59
                  300        1.02  0.3     0.38  0.54  0.59
                  300        1     0.3     0.36  0.54  0.59
                  300        1.06  0.3     0.4   0.52  0.57
                  300        1.14  0.3     0.36  0.49  0.54
                  300        1.23  0.3     0.38  0.46  0.51
                  SoilCrop WheatSoil: LL=[0.22, 0.34, 0.38, 0.36, 0.4, 0.36, 0.46]; KL=[0.1, 0.1, 0.08, 0.06, 0.04, 0.02, 0.01]; XF=[1, 1, 1, 1, 1, 1, 1]
                  SoilCrop OatsSoil: LL=[0.34, 0.34, 0.38, 0.36, 0.4, 0.36, 0.46]; KL=[0.06, 0.06, 0.04, 0.04, 0.02, 0.02, 0.01]; XF=[1, 1, 1, 1, 1, 1, 1]
                SoilWater: SummerDate=1-Nov; SummerU=6; SummerCona=3.5; WinterDate=1-Apr; WinterU=6; WinterCona=3.5; DiffusConst=40; DiffusSlope=16; Salb=0.13; CN2Bare=73; CNRed=20; CNCov=0.8; max_pond=0; Thickness=[150, 150, 300, 300, 300, 300, 300]; SWCON=[0.3, 0.3, 0.3, 0.3, 0.3, 0.3, 0.3]; residueinterception=0
                SoilNitrogen: fom_type=[default, manure, mucuna, lablab, shemp, stable]; fract_carb=[0.2, 0.3, 0.54, 0.57, 0.45, 0]; fract_cell=[0.7, 0.3, 0.37, 0.37, 0.47, 0.1]; fract_lign=[0.1, 0.4, 0.09, 0.06, 0.08, 0.9]
                SoilOrganicMatter: RootCN=40; RootWt=200; SoilCN=12.5; EnrACoeff=7.4; EnrBCoeff=0.2; OCUnits=Total
                  Thickness  OC    FBiom  FInert
                  150        1.24  0.03   0.4
                  150        1.24  0.02   0.6
                  300        1.25  0.01   0.8
                  300        1.1   0.01   0.9
                  300        0.71  0.01   0.95
                  300        0.34  0.01   0.95
                  300        0.26  0.01   0.95
                Analysis: Thickness=[150, 150, 300, 300, 300, 300, 300]; PH=[7, 7, 7, 7, 7, 7, 7]; PHUnits=Water; BoronUnits=HotWater
                Sample Initial nitrogen: NO3Units=ppm; NH4Units=ppm; SWUnits=Volumetric; OCUnits=Total; PHUnits=Water
                  Thickness  NO3   NH4
                  150        26.8  0.6
                  150        6.6   0.1
                  300        5.8   0.1
                  300        10.2  0.1
                  300        12.9  0.1
                  300        11.6  0.1
                  300        11.6  0.1
                Sample Initial water: Thickness=[150, 150, 300, 300, 300, 300, 300]; SW=[0.38, 0.46, 0.42, 0.37, 0.33, 0.35, 0.35]; NO3Units=ppm; NH4Units=ppm; SWUnits=Volumetric; OCUnits=Total; PHUnits=Water
                CERESSoilTemperature
              SoluteManager
              Irrigation
              SurfaceOrganicMatter Surface Organic Matter: same as Validation.New Zealand.RS_Oats_9899.Rainshelter.paddock.Surface Organic Matter
              Fertiliser
              MicroClimate: a_interception=0; b_interception=1; c_interception=0; d_interception=0; soil_albedo=0.3; sun_angle=15; soil_heat_flux_fraction=0.4; night_interception_fraction=0.5; refheight=2; albedo=0.293662; emissivity=0.96; RadIntTotal=0
              Plant Oats: CropType=Oats
              Folder Management
                Manager Cutting
                  script: same as in Validation.Australia.Wellcamp2006.Wellcamp2006.Factors.Cut.None
                Operations IrrigandFert
                  2006-04-03  [Fertiliser].Apply(35, Fertiliser.Types.NO3N, 20);
                  2006-05-10  [Irrigation].Apply(40);
                  2006-08-15  [Fertiliser].Apply(40, Fertiliser.Types.NO3N, 10);
                  2006-06-05  [Irrigation].Apply(60);
                Operations Sowing
                Manager Harvesting
                  script: same as in Validation.New Zealand.WinterSowing2015.ABlock.paddock.Manager folder.Harvesting
              Report DailyReport
              Report HarvestReport
              Report SupReport: EventNames=[Clock].DoReport
                VariableNames:
                  [Clock].Today
                  [Phenology].ThermalTime.Value()
                  [Leaf].CohortSize
                  [Leaf].CohortParameters.MaxArea.Value()
                  [Oats].Arbitrator.DMAllocated
                  [Oats].Arbitrator.DMDemand
                  [Oats].Arbitrator.DMNutrientLimitation
                  [Oats].Arbitrator.DMSinkLimitation
                  [Oats].Arbitrator.DM.TotalFixationSupply
                  [Oats].Arbitrator.FN
                  [Oats].Arbitrator.NDemand
                  [Oats].Structure.Phyllochron
                  [Oats].Leaf.CohortMaxSize
                  [Oats].Leaf.CohortParameters.GrowthDuration.Value()
                  [Oats].Leaf.CohortParameters.LagDuration.Value()
                  [Oats].Leaf.CohortParameters.SenescenceDuration.Value()
                  [Oats].Leaf.CohortParameters.SpecificLeafAreaMax.Value()
                  [Oats].Leaf.CohortParameters.SpecificLeafAreaMin.Value()
                  [Oats].Leaf.Photosynthesis.FT.Value()
                  [Oats].Leaf.Photosynthesis.FVPD.Value()
                  [Oats].Leaf.Photosynthesis.RueAct
                  [Oats].Stem.DMDemandFunction.HightLimitedDMAccumulation.Value()
                  [Oats].Stem.DMDemandFunction.PotentialDMAccumulation.Value()
                  [Oats].Leaf.NextExpandingLeafProportion
                  [Oats].Structure.MeanTillerGrowthRate.Value()
                  sum([Soil].SoilWater.SWmm[1:7]) as ProfileWater
      Folder Roma2006
        Memo
          This experiment was run at Roma Research Station, Queensland in 2006.
           Two reps were used to generate cut and regrowth data (two cuts taken).
          The third rep was split in two, and one half was used to allow unlimited growth (no cutting), and the other half was only cut once.

          Inaccuracy in the prediction of SLA and LAI was probably due to measurement error. The trial was heavily water stressed and it was difficult to accurately measure leaf area of curled, drought stress leaves.
        Experiment Roma2006
          Memo Experiment Description: same as Validation.New Zealand.RS_Oats_9899.Experiment Description
          Factors
            Factor Cv: Specifications=[Sowing]
              Operations Coolibah
                2006-05-25  [Oats].Sow(population:129, cultivar:"Coolibah", depth:30, rowSpacing:250);
              Operations Taipan
                2006-05-25  [Oats].Sow(population:123, cultivar:"Taipan", depth:30, rowSpacing:250);
              Operations Algerian
                2006-05-25  [Oats].Sow(population:105, cultivar:"Algerian", depth:30, rowSpacing:250);
            Factor Cut: Specifications=[Cutting]
              Manager None
                script: same as in Validation.Australia.Wellcamp2006.Wellcamp2006.Factors.Cut.None
              Manager One
                CutDate = 2006-08-10
```csharp
using System;
using System.Collections.Generic;
using Models.Core;
using Models.PMF;
using Models.PMF.Interfaces;
using System.Xml.Serialization;

namespace Models
{
    [Serializable] 
    [System.Xml.Serialization.XmlInclude(typeof(Model))]
    public class Script : Model
    {
        [Link] Plant Oats;
        [Link] Clock Clock;

        [Description("Cut Date")]
        public DateTime CutDate { get; set; }

        [XmlIgnore] private RemovalFractions Remove { get; set; }
        
        [EventSubscribe("Commencing")]
        private void OnSimulationCommencing(object sender, EventArgs e)
        {
            Remove = new RemovalFractions();
        }
        
        [EventSubscribe("DoManagement")]
        private void OnDoManagement(object sender, EventArgs e)
        {
            //Set up  array of remove fractions to send with Cut method.  Each member in the array corresponds to an organ in the same order they are set up in.
            if (Clock.Today.Date == CutDate)
            {
                //Remove.SetPhenologyStage = 3.5;
                Remove.SetFractionToRemove("Panicle", 1.0);
                Remove.SetFractionToResidue("Panicle", 0.0);
                Remove.SetFractionToRemove("Leaf", 0.7);
                Remove.SetFractionToResidue("Leaf", 0.0);
                Remove.SetFractionToRemove("Stem", 0.7);
                Remove.SetFractionToResidue("Stem", 0.0);
                Remove.SetFractionToRemove("Grain", 1.0);
                Remove.SetFractionToResidue("Grain", 0.0);
                Remove.SetFractionToRemove("Root", 0.0);
                Remove.SetFractionToResidue("Root", 0.0);
                Oats.RemoveBiomass("Cut", Remove);
            }
        }
    }
}
```
              Manager Two
                CutDate1 = 2006-08-10
                CutDate2 = 2006-09-04
```csharp
using System;
using System.Collections.Generic;
using Models.Core;
using Models.PMF;
using Models.PMF.Interfaces;
using System.Xml.Serialization;

namespace Models
{
    [Serializable] 
    [System.Xml.Serialization.XmlInclude(typeof(Model))]
    public class Script : Model
    {
        [Link] Plant Oats;
        [Link] Clock Clock;

        [Description("Cut Date1")]
        public DateTime CutDate1 { get; set; }
        [Description("Cut Date2")]
        public DateTime CutDate2 { get; set; }

        [XmlIgnore] private RemovalFractions Remove { get; set; }
        
        [EventSubscribe("Commencing")]
        private void OnSimulationCommencing(object sender, EventArgs e)
        {
            Remove = new RemovalFractions();
        }
        
        [EventSubscribe("DoManagement")]
        private void OnDoManagement(object sender, EventArgs e)
        {
            //Set up  array of remove fractions to send with Cut method.  Each member in the array corresponds to an organ in the same order they are set up in.
            if (Clock.Today.Date == CutDate1)
            {
                //Remove.SetPhenologyStage = 3.5;
                Remove.SetFractionToRemove("Panicle", 1.0);
                Remove.SetFractionToResidue("Panicle", 0.0);
                Remove.SetFractionToRemove("Leaf", 0.7);
                Remove.SetFractionToResidue("Leaf", 0.0);
                Remove.SetFractionToRemove("Stem", 0.7);
                Remove.SetFractionToResidue("Stem", 0.0);
                Remove.SetFractionToRemove("Grain", 1.0);
                Remove.SetFractionToResidue("Grain", 0.0);
                Remove.SetFractionToRemove("Root", 0.0);
                Remove.SetFractionToResidue("Root", 0.0);
                Oats.RemoveBiomass("Cut", Remove);
            }
            if (Clock.Today.Date == CutDate2)
            {
                //Remove.SetPhenologyStage = 3.5;
                Remove.SetFractionToRemove("Panicle", 1.0);
                Remove.SetFractionToResidue("Panicle", 0.0);
                Remove.SetFractionToRemove("Leaf", 0.7);
                Remove.SetFractionToResidue("Leaf", 0.0);
                Remove.SetFractionToRemove("Stem", 0.7);
                Remove.SetFractionToResidue("Stem", 0.0);
                Remove.SetFractionToRemove("Grain", 1.0);
                Remove.SetFractionToResidue("Grain", 0.0);
                Remove.SetFractionToRemove("Root", 0.0);
                Remove.SetFractionToResidue("Root", 0.0);
                Oats.RemoveBiomass("Cut", Remove);
            }
        }
    }
}
```
          Simulation Roma2006Base
            Clock: StartDate=2006-05-24; EndDate=2006-11-20
            Summary summaryfile
            Weather: FileName=Roma2006.met
            Zone paddock: Area=1; Slope=0
              Soil: Latitude=0; Longitude=0
                Water
                  Thickness  BD    AirDry  LL15  DUL    SAT
                  150        1.25  0.11    0.19  0.4    0.45
                  150        1.33  0.15    0.19  0.389  0.44
                  300        1.32  0.18    0.21  0.422  0.47
                  300        1.47  0.19    0.22  0.317  0.4
                  300        1.52  0.19    0.22  0.332  0.38
                  300        1.55  0.19    0.22  0.33   0.38
                  SoilCrop OatsSoil: LL=[0.2, 0.2, 0.21, 0.26, 0.29, 0.3]; KL=[0.06, 0.05, 0.04, 0.03, 0.02, 0.02]; XF=[1, 1, 0.5, 0.2, 0.2, 0.2]
                SoilWater: SummerDate=1-Nov; SummerU=2; SummerCona=2; WinterDate=1-Apr; WinterU=2; WinterCona=2; DiffusConst=40; DiffusSlope=16; Salb=0.13; CN2Bare=78; CNRed=20; CNCov=0.8; max_pond=0; Thickness=[150, 150, 300, 300, 300, 300]; SWCON=[0.3, 0.3, 0.3, 0.5, 0.5, 0.5]; residueinterception=0
                SoilNitrogen: fom_type=[default, manure, mucuna, lablab, shemp, stable]; fract_carb=[0.2, 0.3, 0.54, 0.57, 0.45, 0]; fract_cell=[0.7, 0.3, 0.37, 0.37, 0.47, 0.1]; fract_lign=[0.1, 0.4, 0.09, 0.06, 0.08, 0.9]
                SoilOrganicMatter: RootCN=20; RootWt=500; SoilCN=14.5; EnrACoeff=7.4; EnrBCoeff=0.2; OCUnits=Total
                  Thickness  OC    FBiom  FInert
                  150        1.46  0.035  0.45
                  150        0.7   0.02   0.55
                  300        0.3   0.015  0.8
                  300        0.15  0.01   0.99
                  300        0.05  0.01   0.99
                  300        0.05  0.01   0.99
                Analysis: Thickness=[150, 150, 300, 300, 300, 300]; PH=[7.2, 7.9, 7.9, 7.3, 7.1, 7.1]; PHUnits=Water; BoronUnits=HotWater
                Sample Initial nitrogen: NO3Units=ppm; NH4Units=ppm; SWUnits=Volumetric; OCUnits=Total; PHUnits=Water
                  Thickness  NO3   NH4
                  150        16.1  0.3
                  150        21.7  0.3
                  300        24.3  0.3
                  300        13.3  0.3
                  300        7.9   0.3
                  300        7.9   0.5
                Sample Initial water: Thickness=[150, 150, 300, 300, 300, 300]; SW=[0.327, 0.333, 0.333, 0.262, 0.286, 0.29]; NO3Units=ppm; NH4Units=ppm; SWUnits=Volumetric; OCUnits=Total; PHUnits=Water
                CERESSoilTemperature
              SoluteManager
              Irrigation
              SurfaceOrganicMatter Surface Organic Matter: same as Validation.New Zealand.RS_Oats_9899.Rainshelter.paddock.Surface Organic Matter
              Fertiliser
              MicroClimate: a_interception=0; b_interception=1; c_interception=0; d_interception=0; soil_albedo=0.3; sun_angle=15; soil_heat_flux_fraction=0.4; night_interception_fraction=0.5; refheight=2; albedo=0.293662; emissivity=0.96; RadIntTotal=0
              Plant Oats: CropType=Oats
              Folder Management
                Manager Cutting
                  script: same as in Validation.Australia.Wellcamp2006.Wellcamp2006.Factors.Cut.None
                Operations IrrigandFert
                  2006-05-25  [Fertiliser].Apply(35, Fertiliser.Types.NO3N, 20);
                  2006-05-29  [Irrigation].Apply(10);
                  2006-06-05  [Irrigation].Apply(10);
                  2006-08-15  [Fertiliser].Apply(40, Fertiliser.Types.NO3N, 10);
                  2006-06-05  [Irrigation].Apply(60);
                Operations Sowing
                Manager Harvesting
                  script: same as in Validation.New Zealand.WinterSowing2015.ABlock.paddock.Manager folder.Harvesting
              Report DailyReport
              Report HarvestReport
              Report SupReport: same as Validation.Australia.Gatton2007.Gatton2007early.Gatton2007.Gatton2007Base.paddock.SupReport
            SoilArbitrator Soil Arbitrator
      Folder Tarlee2007
        Memo
          This experiment was run at Tarlee, South Australia, in 2007.
        Experiment Tarlee2007
          Memo Experiment Description: same as Validation.New Zealand.RS_Oats_9899.Experiment Description
          Factors
            Factor AgRegime: Specifications=[Operations]
              Operations HighInput
                2007-05-30  [Fertiliser].Apply(100, Fertiliser.Types.UreaN, 10);
                2007-08-27  [Irrigation].Apply(62);
                2007-09-17  [Irrigation].Apply(62);
              Operations LowInput
                2007-05-30  [Fertiliser].Apply(50, Fertiliser.Types.UreaN, 10);
          Simulation Tarlee2007Base
            Clock: StartDate=2007-05-03; EndDate=2007-11-30
            Summary summaryfile
            Weather: FileName=MNHRZ_onsite_metdata07.met
            Zone paddock: Area=1; Slope=0
              Soil: SoilType=Clay Loam over Medium Clay; Site=Tarlee (TDS); NearestTown=Giles Corner; Region=Mid-north; State=South Australia; Latitude=-34.2367; Longitude=138.741; LocationAccuracy=+-20m; DataSource=University of Adelaide, Roseworthy
                Water
                  Thickness  BD     AirDry  LL15   DUL    SAT
                  100        1.342  0.093   0.15   0.371  0.463
                  200        1.348  0.147   0.184  0.367  0.461
                  250        1.342  0.15    0.18   0.414  0.464
                  250        1.48   0.15    0.2    0.403  0.436
                  300        1.58   0.15    0.21   0.363  0.398
                  400        1.56   0.15    0.22   0.371  0.406
                  300        1.56   0.15    0.22   0.371  0.406
                  SoilCrop WheatSoil: LL=[0.186, 0.184, 0.228, 0.251, 0.261, 0.285, 0.285]; KL=[0.06, 0.06, 0.06, 0.04, 0.04, 0.02, 0.02]; XF=[1, 1, 1, 1, 1, 1, 1]
                  SoilCrop BarleySoil: LL=[0.186, 0.184, 0.228, 0.251, 0.261, 0.285, 0.285]; KL=[0.07, 0.07, 0.07, 0.05, 0.05, 0.03, 0.03]; XF=[1, 1, 1, 1, 1, 1, 1]
                  SoilCrop OatsSoil: LL=[0.15, 0.174, 0.216, 0.257, 0.263, 0.263, 0.263]; KL=[0.1, 0.1, 0.07, 0.07, 0.04, 0.03, 0.03]; XF=[1, 1, 1, 1, 1, 1, 1]
                  SoilCrop VetchSoil: LL=[0.186, 0.184, 0.216, 0.223, 0.237, 0.24, 0.24]; KL=[0.06, 0.06, 0.06, 0.04, 0.04, 0.02, 0.02]; XF=[1, 1, 1, 1, 1, 1, 1]
                SoilWater: SummerDate=1-Nov; SummerU=6; SummerCona=3.5; WinterDate=1-Apr; WinterU=2; WinterCona=2; DiffusConst=60; DiffusSlope=20; Salb=0.13; CN2Bare=73; CNRed=20; CNCov=0.8; max_pond=0; Thickness=[100, 200, 250, 250, 300, 400, 300]; SWCON=[0.5, 0.5, 0.5, 0.5, 0.5, 0.5, 0.5]; residueinterception=0
                SoilNitrogen: fom_type=[default, manure, mucuna, lablab, shemp, stable]; fract_carb=[0.2, 0.3, 0.54, 0.57, 0.45, 0]; fract_cell=[0.7, 0.3, 0.37, 0.37, 0.47, 0.1]; fract_lign=[0.1, 0.4, 0.09, 0.06, 0.08, 0.9]
                SoilOrganicMatter: RootCN=40; RootWt=1000; SoilCN=12; EnrACoeff=7.4; EnrBCoeff=0.2; OCUnits=Total
                  Thickness  OC    FBiom  FInert
                  100        1.56  0.04   0.4
                  200        0.74  0.02   0.5
                  250        0.48  0.02   0.7
                  250        0.2   0.02   1
                  300        0.13  0.01   1
                  400        0.13  0.01   1
                  300        0.13  0.01   1
                Analysis: Thickness=[100, 200, 250, 250, 300, 400, 300]; PH=[7.2, 7.4, 8.1, 9, 9.3, 9.3, 9.3]; PHUnits=Water; BoronUnits=HotWater
                Sample Initial nitrogen: NO3Units=ppm; NH4Units=ppm; SWUnits=Volumetric; OCUnits=Total; PHUnits=Water
                  Thickness  NO3       NH4
                  100        15.0001   1.00004
                  200        11        1.99998
                  250        8.00003   1.00004
                  250        4.39999   0.999998
                  300        2         0.0999905
                  400        0.999999  0.0999905
                  300        1         0.1
                Sample Initial water: Thickness=[100, 200, 250, 250, 300, 400, 300]; SW=[0.22, 0.23, 0.255, 0.3, 0.332, 0.328, 0.328]; NO3Units=ppm; NH4Units=ppm; SWUnits=Volumetric; OCUnits=Total; PHUnits=Water
                CERESSoilTemperature
              SoluteManager
              Irrigation
              SurfaceOrganicMatter Surface Organic Matter: same as Validation.New Zealand.RS_Oats_9899.Rainshelter.paddock.Surface Organic Matter
              Fertiliser
              MicroClimate: a_interception=0; b_interception=1; c_interception=0; d_interception=0; soil_albedo=0.3; sun_angle=15; soil_heat_flux_fraction=0.4; night_interception_fraction=0.5; refheight=2; albedo=0.293662; emissivity=0.96; RadIntTotal=0
              Plant Oats: CropType=Oats
              Folder Management
                Operations Sowing
                  2007-05-11  [Oats].Sow(population:200, cultivar:"Wintaroo", depth:30, rowSpacing:250);
                Operations
                Operations Harverst
                  2007-11-17  [Oats].Harvest()
              Report DailyReport
              Report HarvestReport
              Report SupReport: EventNames=[Clock].DoReport
                VariableNames:
                  [Clock].Today
                  [Phenology].ThermalTime.Value()
                  [Leaf].CohortSize
                  [Leaf].CohortParameters.MaxArea.Value()
                  [Oats].Arbitrator.DMAllocated
                  [Oats].Arbitrator.DMDemand
                  [Oats].Arbitrator.DMNutrientLimitation
                  [Oats].Arbitrator.DMSinkLimitation
                  [Oats].Arbitrator.DM.TotalFixationSupply
                  [Oats].Arbitrator.FN
                  [Oats].Arbitrator.NDemand
                  [Oats].Structure.Phyllochron
                  [Oats].Leaf.CohortMaxSize
                  [Oats].Leaf.CohortParameters.GrowthDuration.Value()
                  [Oats].Leaf.CohortParameters.LagDuration.Value()
                  [Oats].Leaf.CohortParameters.SenescenceDuration.Value()
                  [Oats].Leaf.CohortParameters.SpecificLeafAreaMax.Value()
                  [Oats].Leaf.CohortParameters.SpecificLeafAreaMin.Value()
                  [Oats].Leaf.Photosynthesis.FT.Value()
                  [Oats].Leaf.Photosynthesis.FVPD.Value()
                  [Oats].Leaf.Photosynthesis.RueAct
                  [Oats].Stem.DMDemandFunction.HightLimitedDMAccumulation.Value()
                  [Oats].Stem.DMDemandFunction.PotentialDMAccumulation.Value()
                  [Oats].Leaf.NextExpandingLeafProportion
                  [Oats].Structure.MeanTillerGrowthRate.Value()
                  sum([Soil].SoilWater.SWmm[1:6]) as ProfileWater
            SoilArbitrator Soil Arbitrator
      Folder Pinery2007
        Memo
          This experiment was run at Pinery, South Australia, in 2007.
          Consisted of three separate large plots of three cultivars - i.e. the design was not replicated
          No guarantee the soil was exactly the same for each cultivar.
        Experiment Pinery2007
          Memo Experiment Description: same as Validation.New Zealand.RS_Oats_9899.Experiment Description
          Factors
            Factor Cv: Specifications=[Operations]
              Operations Wintaroo
                2007-06-05  [Oats].Sow(population:100, cultivar:"Wintaroo", depth:30, rowSpacing:250);
              Operations Kangaroo
                2007-06-05  [Oats].Sow(population:100, cultivar:"Kangaroo", depth:30, rowSpacing:250);
              Operations Brusher
                2007-06-05  [Oats].Sow(population:100, cultivar:"Brusher", depth:30, rowSpacing:250);
          Simulation Pinery2007Base
            Clock: StartDate=2007-05-03; EndDate=2007-11-30
            Summary summaryfile
            Weather: FileName=Owen2007.met
            SoilArbitrator Soil Arbitrator
            Zone paddock: Area=1; Slope=0
              SoluteManager
              Irrigation
              SurfaceOrganicMatter Surface Organic Matter: same as Validation.New Zealand.RS_Oats_9899.Rainshelter.paddock.Surface Organic Matter
              Fertiliser
              MicroClimate: a_interception=0; b_interception=1; c_interception=0; d_interception=0; soil_albedo=0.3; sun_angle=15; soil_heat_flux_fraction=0.4; night_interception_fraction=0.5; refheight=2; albedo=0.293662; emissivity=0.96; RadIntTotal=0
              Plant Oats: CropType=Oats
              Folder Management
                Operations
                Manager Harvesting
                  script: same as in Validation.New Zealand.WinterSowing2015.ABlock.paddock.Manager folder.Harvesting
              Report DailyReport
              Report HarvestReport
              Report SupReport: same as Validation.Australia.Tarlee2007.Tarlee2007.Tarlee2007Base.paddock.SupReport
              Soil: ASCOrder=Calcarosol; ASCSubOrder=Hypercalcic; SoilType=Loam; Site=Pinery; NearestTown=Owen; Region=Mid North; State=South Australia; Country=Australia; ApsoilNumber=273; Latitude=-34.309; Longitude=138.46; LocationAccuracy=+/- 20m
                DataSource=Characterisation 2006 by University of Adelaide, CSIRO Sustainable Ecosystems and Ag Consulting as part of GRDC project 'Training growers to manage soil water'
                Comments=OC estimated for all depths; Barley CLL measured, estimated for other crops, LL15, AD all estimated;Root depth: Barley 65cm. Moderate clay soil with moderate-high CEC. High ESP and toxic levels of boron mobilised by high pH will impede root growth below about 65cm; pH also reduces trace element availability. Slaking or dispersion possible at depth.
                Water
                  Thickness  BD     AirDry  LL15   DUL    SAT
                  150        1.356  0.07    0.14   0.269  0.458
                  150        1.272  0.109   0.136  0.251  0.49
                  200        1.378  0.146   0.146  0.281  0.45
                  300        1.454  0.146   0.146  0.349  0.421
                  300        1.465  0.146   0.146  0.366  0.417
                  400        1.561  0.146   0.146  0.34   0.39
                  SoilCrop WheatSoil: LL=[0.14, 0.136, 0.146, 0.256, 0.299, 0.34]; KL=[0.06, 0.06, 0.06, 0.04, 0.04, 0.02]; XF=[1, 1, 1, 1, 0.5, 0.4]
                  SoilCrop BarleySoil: LL=[0.14, 0.136, 0.146, 0.256, 0.299, 0.34]; KL=[0.07, 0.07, 0.07, 0.05, 0.05, 0.03]; XF=[1, 1, 1, 1, 0.5, 0.4]
                  SoilCrop OatsSoil: LL=[0.14, 0.16, 0.16, 0.17, 0.17, 0.24]; KL=[0.06, 0.06, 0.06, 0.04, 0.04, 0.02]; XF=[1, 1, 1, 1, 0.5, 0.4]
                SoilWater: SummerDate=1-Nov; SummerU=6; SummerCona=3.5; WinterDate=1-Apr; WinterU=2; WinterCona=2; DiffusConst=60; DiffusSlope=20; Salb=0.14; CN2Bare=73; CNRed=20; CNCov=0.8; max_pond=0; Thickness=[150, 150, 200, 300, 300, 400]; SWCON=[0.4, 0.4, 0.4, 0.3, 0.3, 0.3]; residueinterception=0
                SoilNitrogen: fom_type=[default, manure, mucuna, lablab, shemp, stable]; fract_carb=[0.2, 0.3, 0.54, 0.57, 0.45, 0]; fract_cell=[0.7, 0.3, 0.37, 0.37, 0.47, 0.1]; fract_lign=[0.1, 0.4, 0.09, 0.06, 0.08, 0.9]
                SoilOrganicMatter: RootCN=40; RootWt=1000; SoilCN=12; EnrACoeff=7.4; EnrBCoeff=0.2; OCUnits=Total
                  Thickness  OC    FBiom  FInert
                  150        1     0.04   0.4
                  150        0.8   0.02   0.5
                  200        0.5   0.02   0.7
                  300        0.25  0.02   1
                  300        0.15  0.01   1
                  400        0.1   0.01   1
                Analysis: Thickness=[150, 150, 200, 300, 300, 400]; PH=[8.4, 8.7, 9.3, 9.9, 9.9, 9.7]; PHUnits=Water; BoronUnits=HotWater
                Sample Initial nitrogen: NO3Units=ppm; NH4Units=ppm; SWUnits=Volumetric; OCUnits=Total; PHUnits=Water
                  Thickness  NO3      NH4
                  150        20.0037  1.00004
                  150        18.3254  1.99998
                  200        16.2544  1.00004
                  300        13.1493  0.999998
                  300        14.235   0.0999905
                  400        16.8141  0.0999905
                Sample Initial water: Thickness=[150, 150, 200, 300, 300, 400]; SW=[0.272, 0.232, 0.224, 0.191, 0.209, 0.262]; NO3Units=ppm; NH4Units=ppm; SWUnits=Volumetric; OCUnits=Total; PHUnits=Water
                CERESSoilTemperature
      Folder Roma2006ESowtest
        Memo
          This experiment was run at Roma Research Station, Queensland in 2006.
           Two reps were used to generate cut and regrowth data (two cuts taken).
          The third rep was split in two, and one half was used to allow unlimited growth (no cutting), and the other half was only cut once.
        Experiment Roma2006ESowtest
          Memo Experiment Description
            Checking phenology output on early sowing date - sensibility test
          Factors
            Factor Cv: Specifications=[Sowing].Script.CultivarName=Coolibah,Taipan,Algerian
          Simulation Roma2006ESowtestBase
            Clock: StartDate=1990-01-01; EndDate=2006-11-20
            Summary summaryfile
            Weather: FileName=RomaLT.met
            Zone paddock: Area=1; Slope=0
              Soil: same as Validation.Australia.Roma2006.Roma2006.Roma2006Base.paddock.Soil
              SoluteManager
              Irrigation
              SurfaceOrganicMatter Surface Organic Matter: same as Validation.New Zealand.RS_Oats_9899.Rainshelter.paddock.Surface Organic Matter
              Fertiliser
              MicroClimate: a_interception=0; b_interception=1; c_interception=0; d_interception=0; soil_albedo=0.3; sun_angle=15; soil_heat_flux_fraction=0.4; night_interception_fraction=0.5; refheight=2; albedo=0.293662; emissivity=0.96; RadIntTotal=0
              Plant Oats: CropType=Oats
              Folder Management
                Manager Cutting
                  script: same as in Validation.Australia.Wellcamp2006.Wellcamp2006.Factors.Cut.None
                Operations IrrigandFert: same as Validation.Australia.Roma2006.Roma2006.Roma2006Base.paddock.Management.IrrigandFert
                Manager Harvesting
                  script: same as in Validation.New Zealand.WinterSowing2015.ABlock.paddock.Manager folder.Harvesting
              Report DailyReport
              Report HarvestReport
              Report SupReport: same as Validation.Australia.Gatton2007.Gatton2007early.Gatton2007.Gatton2007Base.paddock.SupReport
              Manager Sowing
                SowDate = 02-Feb
                CultivarName =
                SowingDepth = 30
                RowSpacing = 250
                Population = 100
```csharp
using System;
using Models.Core;
using Models.PMF;
using Models.Soils;
using Models.Utilities;
using APSIM.Shared.Utilities;

namespace Models
{
    [Serializable]
    public class Script : Model
    {
        [Link] Clock Clock;
        [Link] Fertiliser Fertiliser;
        [Link] Summary Summary;
        [Link] Soil Soil;
        [Link] Plant Oats;
        Accumulator accumulatedRain;
        
        [Description("Sowing date (d-mmm)")]
        public string SowDate { get; set; }
    [Display(DisplayType = DisplayAttribute.DisplayTypeEnum.CultivarName)]
        [Description("Cultivar to be sown")]
        public string CultivarName { get; set; }
        [Description("Sowing depth (mm)")]
        public double SowingDepth { get; set; }
        [Description("Row spacing (mm)")]
        public double RowSpacing { get; set; }
        [Description("Plant population (/m2)")]
        public double Population { get; set; }
        


        [EventSubscribe("DoManagement")]
        private void OnDoManagement(object sender, EventArgs e)
        {
            if (DateUtilities.WithinDates(SowDate, Clock.Today, SowDate))
            {
                Oats.Sow(population: Population, cultivar: CultivarName, depth: SowingDepth, rowSpacing: RowSpacing);    
            }
        
        }
        
    }
}
```
            SoilArbitrator Soil Arbitrator
      Folder LRCphenology
        Memo
          This experiment was run at DPI Wellcamp Research Station, Queensland in 2006.
          Phenology data only
        Experiment LRC2011
          Memo Experiment Description: same as Validation.New Zealand.RS_Oats_9899.Experiment Description
          Factors
            Factor Cv
              Specifications=[SowAndCut].Script.Cultivar = Algerian, Nugene, Drover, Genie
            Factor Management: Specifications=[SowAndCut].Script.Management = 1 to 3 step 1
          Simulation LRC2011Base
            Clock: StartDate=2011-02-01; EndDate=2011-12-31
            Summary summaryfile
            Weather: FileName=Toowoomba_AP.met
            SoilArbitrator Soil Arbitrator
            Zone paddock: Area=1; Slope=0
              Soil: same as Validation.Australia.Wellcamp2006.Wellcamp2006.Wellcamp2006Base.paddock.Soil
              SoluteManager
              Irrigation
              SurfaceOrganicMatter Surface Organic Matter: same as Validation.New Zealand.RS_Oats_9899.Rainshelter.paddock.Surface Organic Matter
              Fertiliser
              MicroClimate: a_interception=0; b_interception=1; c_interception=0; d_interception=0; soil_albedo=0.3; sun_angle=15; soil_heat_flux_fraction=0.4; night_interception_fraction=0.5; refheight=2; albedo=0.293662; emissivity=0.96; RadIntTotal=0
              Plant Oats: CropType=Oats
              Folder Management
                Operations IrrigandFert
                  2011-04-03  [Fertiliser].Apply(35, Fertiliser.Types.NO3N, 20);
                  2011-04-01  [Irrigation].Apply(40);
                  2011-08-15  [Fertiliser].Apply(40, Fertiliser.Types.NO3N, 10);
                  2011-06-30  [Irrigation].Apply(25);
                  2011-07-30  [Irrigation].Apply(25);
                  2011-08-15  [Irrigation].Apply(30);
                  2011-09-30  [Irrigation].Apply(40);
                  2011-10-30  [Irrigation].Apply(40);
                  2011-11-15  [Irrigation].Apply(40);
                Manager Harvesting
                  script: same as in Validation.New Zealand.WinterSowing2015.ABlock.paddock.Manager folder.Harvesting
                Manager SowAndCut
                  Cultivar = Coolibah
                  Management = 0
```csharp
using System;
using System.Collections.Generic;
using Models.Core;
using Models.PMF;
using Models.PMF.Interfaces;
using System.Xml.Serialization;
using APSIM.Shared.Utilities;

namespace Models
{
    [Serializable] 
    [System.Xml.Serialization.XmlInclude(typeof(Model))]
    public class Script : Model
    {
        [Link] Plant Oats;
        [Link] Clock Clock;

        [Description("Cultivar")]
        public string Cultivar { get; set; }
        [Description("Management")]
        public int Management { get; set; }

        private string SowDate;
        private string CutDate1;
        private string CutDate2;


        [XmlIgnore] private RemovalFractions Remove { get; set; }
        
        [EventSubscribe("Commencing")]
        private void OnSimulationCommencing(object sender, EventArgs e)
        {
            Remove = new RemovalFractions();
            if (Management == 1)
            {
            SowDate = "9-feb";
            CutDate1 = "";
            CutDate2 = "";
            }
            else if (Management == 2)
            {
            SowDate = "8-mar";
            CutDate1 = "";
            CutDate2 = "";
            }
            else if (Management == 3)
            {
            SowDate = "5-apr";
            CutDate1 = "";
            CutDate2 = "";
            }
            else if (Management == 4)
            {
            SowDate = "9-feb";
            CutDate1 = "12-apr";
            CutDate2 = "10-may";
            }
            else if (Management == 5)
            {
            SowDate = "8-mar";
            CutDate1 = "9-may";
            CutDate2 = "6-jun";
            }
            else if (Management == 6)
            {
            SowDate = "5-apr";
            CutDate1 = "6-jun";
            CutDate2 = "4-jul";
            }

        }
        
        [EventSubscribe("DoManagement")]
        private void OnDoManagement(object sender, EventArgs e)
        {

            if (DateUtilities.WithinDates(SowDate,Clock.Today,SowDate) )
            {
                Oats.Sow(population:95, cultivar: Cultivar, depth:40, rowSpacing:250);
            }

            //Set up  array of remove fractions to send with Cut method.  Each member in the array corresponds to an organ in the same order they are set up in.
            if (CutDate1 !="")
                if (DateUtilities.WithinDates(CutDate1,Clock.Today,CutDate1))
                {
                    //Remove.SetPhenologyStage = 2.0;
                    Remove.SetFractionToRemove("Panicle", 1.0);
                    Remove.SetFractionToResidue("Panicle", 0.0);
                    Remove.SetFractionToRemove("Leaf", 0.8);
                    Remove.SetFractionToResidue("Leaf", 0.0);
                    Remove.SetFractionToRemove("Stem", 0.8);
                    Remove.SetFractionToResidue("Stem", 0.0);
                    Remove.SetFractionToRemove("Grain", 1.0);
                    Remove.SetFractionToResidue("Grain", 0.0);
                    Remove.SetFractionToRemove("Root", 0.0);
                    Remove.SetFractionToResidue("Root", 0.0);
                    Oats.RemoveBiomass("Cut", Remove);
                }
            //Set up  array of remove fractions to send with Cut method.  Each member in the array corresponds to an organ in the same order they are set up in.
            if (CutDate2 !="")
                if (DateUtilities.WithinDates(CutDate2,Clock.Today,CutDate2))
                {
                    //Remove.SetPhenologyStage = 2.0;
                    Remove.SetFractionToRemove("Panicle", 1.0);
                    Remove.SetFractionToResidue("Panicle", 0.0);
                    Remove.SetFractionToRemove("Leaf", 0.8);
                    Remove.SetFractionToResidue("Leaf", 0.0);
                    Remove.SetFractionToRemove("Stem", 0.8);
                    Remove.SetFractionToResidue("Stem", 0.0);
                    Remove.SetFractionToRemove("Grain", 1.0);
                    Remove.SetFractionToResidue("Grain", 0.0);
                    Remove.SetFractionToRemove("Root", 0.0);
                    Remove.SetFractionToResidue("Root", 0.0);
                    Oats.RemoveBiomass("Cut", Remove);
                }

            
        }
    }
}
```
              Report DailyReport
              Report HarvestReport
              Report SupReport: same as Validation.Australia.Wellcamp2006.Wellcamp2006.Wellcamp2006Base.paddock.SupReport
        Experiment LRC2012
          Memo Experiment Description: same as Validation.New Zealand.RS_Oats_9899.Experiment Description
          Factors
            Factor Cv
              Specifications=[SowAndCut].Script.Cultivar = Algerian, Nugene, Drover, Genie, Aladdin
            Factor Management: Specifications=[SowAndCut].Script.Management = 1 to 3 step 1
          Simulation LRC2012Base
            Clock: StartDate=2012-02-01; EndDate=2012-12-31
            Summary summaryfile
            Weather: FileName=Toowoomba_AP.met
            SoilArbitrator Soil Arbitrator
            Zone paddock: Area=1; Slope=0
              Soil: same as Validation.Australia.Wellcamp2006.Wellcamp2006.Wellcamp2006Base.paddock.Soil
              SoluteManager
              Irrigation
              SurfaceOrganicMatter Surface Organic Matter: same as Validation.New Zealand.RS_Oats_9899.Rainshelter.paddock.Surface Organic Matter
              Fertiliser
              MicroClimate: a_interception=0; b_interception=1; c_interception=0; d_interception=0; soil_albedo=0.3; sun_angle=15; soil_heat_flux_fraction=0.4; night_interception_fraction=0.5; refheight=2; albedo=0.293662; emissivity=0.96; RadIntTotal=0
              Plant Oats: CropType=Oats
              Folder Management
                Operations IrrigandFert
                  2012-04-03  [Fertiliser].Apply(35, Fertiliser.Types.NO3N, 20);
                  2012-04-10  [Irrigation].Apply(40);
                  2012-08-15  [Fertiliser].Apply(40, Fertiliser.Types.NO3N, 10);
                  2012-05-20  [Irrigation].Apply(30);
                  2012-08-10  [Irrigation].Apply(25);
                  2012-08-31  [Irrigation].Apply(30);
                  2012-09-20  [Irrigation].Apply(40);
                  2012-10-30  [Irrigation].Apply(40);
                  2012-11-15  [Irrigation].Apply(25);
                Manager Harvesting
                  script: same as in Validation.New Zealand.WinterSowing2015.ABlock.paddock.Manager folder.Harvesting
                Manager SowAndCut
                  Cultivar = Coolibah
                  Management = 0
```csharp
using System;
using System.Collections.Generic;
using Models.Core;
using Models.PMF;
using Models.PMF.Interfaces;
using System.Xml.Serialization;
using APSIM.Shared.Utilities;

namespace Models
{
    [Serializable] 
    [System.Xml.Serialization.XmlInclude(typeof(Model))]
    public class Script : Model
    {
        [Link] Plant Oats;
        [Link] Clock Clock;

        [Description("Cultivar")]
        public string Cultivar { get; set; }
        [Description("Management")]
        public int Management { get; set; }

        private string SowDate;
        private string CutDate1;
        private string CutDate2;


        [XmlIgnore] private RemovalFractions Remove { get; set; }
        
        [EventSubscribe("Commencing")]
        private void OnSimulationCommencing(object sender, EventArgs e)
        {
            Remove = new RemovalFractions();
            if (Management == 1)
            {
            SowDate = "6-feb";
            CutDate1 = "";
            CutDate2 = "";
            }
            else if (Management == 2)
            {
            SowDate = "5-mar";
            CutDate1 = "";
            CutDate2 = "";
            }
            else if (Management == 3)
            {
            SowDate = "2-apr";
            CutDate1 = "";
            CutDate2 = "";
            }
            else if (Management == 4)
            {
            SowDate = "6-feb";
            CutDate1 = "2-apr";
            CutDate2 = "30-apr";
            }
            else if (Management == 5)
            {
            SowDate = "5-mar";
            CutDate1 = "30-apr";
            CutDate2 = "28-may";
            }
            else if (Management == 6)
            {
            SowDate = "2-apr";
            CutDate1 = "28-may";
            CutDate2 = "25-jun";
            }

        }
        
        [EventSubscribe("DoManagement")]
        private void OnDoManagement(object sender, EventArgs e)
        {

            if (DateUtilities.WithinDates(SowDate,Clock.Today,SowDate) )
            {
                Oats.Sow(population:95, cultivar: Cultivar, depth:40, rowSpacing:250);
            }

            //Set up  array of remove fractions to send with Cut method.  Each member in the array corresponds to an organ in the same order they are set up in.
            if (CutDate1 !="")
                if (DateUtilities.WithinDates(CutDate1,Clock.Today,CutDate1))
                {
                    //Remove.SetPhenologyStage = 2.0;
                    Remove.SetFractionToRemove("Panicle", 1.0);
                    Remove.SetFractionToResidue("Panicle", 0.0);
                    Remove.SetFractionToRemove("Leaf", 0.8);
                    Remove.SetFractionToResidue("Leaf", 0.0);
                    Remove.SetFractionToRemove("Stem", 0.8);
                    Remove.SetFractionToResidue("Stem", 0.0);
                    Remove.SetFractionToRemove("Grain", 1.0);
                    Remove.SetFractionToResidue("Grain", 0.0);
                    Remove.SetFractionToRemove("Root", 0.0);
                    Remove.SetFractionToResidue("Root", 0.0);
                    Oats.RemoveBiomass("Cut", Remove);
                }
            //Set up  array of remove fractions to send with Cut method.  Each member in the array corresponds to an organ in the same order they are set up in.
            if (CutDate2 !="")
                if (DateUtilities.WithinDates(CutDate2,Clock.Today,CutDate2))
                {
                    //Remove.SetPhenologyStage = 2.0;
                    Remove.SetFractionToRemove("Panicle", 1.0);
                    Remove.SetFractionToResidue("Panicle", 0.0);
                    Remove.SetFractionToRemove("Leaf", 0.8);
                    Remove.SetFractionToResidue("Leaf", 0.0);
                    Remove.SetFractionToRemove("Stem", 0.8);
                    Remove.SetFractionToResidue("Stem", 0.0);
                    Remove.SetFractionToRemove("Grain", 1.0);
                    Remove.SetFractionToResidue("Grain", 0.0);
                    Remove.SetFractionToRemove("Root", 0.0);
                    Remove.SetFractionToResidue("Root", 0.0);
                    Oats.RemoveBiomass("Cut", Remove);
                }

            
        }
    }
}
```
              Report DailyReport
              Report HarvestReport
              Report SupReport: same as Validation.Australia.Wellcamp2006.Wellcamp2006.Wellcamp2006Base.paddock.SupReport
        Experiment LRC2014
          Memo Experiment Description: same as Validation.New Zealand.RS_Oats_9899.Experiment Description
          Factors
            Factor Cv
              Specifications=[SowAndCut].Script.Cultivar = Algerian, Drover, Genie, Aladdin, Comet, Taipan, Wizard
            Factor Management: Specifications=[SowAndCut].Script.Management = 1 to 2 step 1
          Simulation LRC2014Base
            Clock: StartDate=2014-02-01; EndDate=2014-12-31
            Summary summaryfile
            Weather: FileName=Toowoomba_AP.met
            SoilArbitrator Soil Arbitrator
            Zone paddock: Area=1; Slope=0
              Soil: same as Validation.Australia.Wellcamp2006.Wellcamp2006.Wellcamp2006Base.paddock.Soil
              SoluteManager
              Irrigation
              SurfaceOrganicMatter Surface Organic Matter: same as Validation.New Zealand.RS_Oats_9899.Rainshelter.paddock.Surface Organic Matter
              Fertiliser
              MicroClimate: a_interception=0; b_interception=1; c_interception=0; d_interception=0; soil_albedo=0.3; sun_angle=15; soil_heat_flux_fraction=0.4; night_interception_fraction=0.5; refheight=2; albedo=0.293662; emissivity=0.96; RadIntTotal=0
              Plant Oats: CropType=Oats
              Folder Management
                Operations IrrigandFert
                  2014-02-01  [Irrigation].Apply(50);
                  2014-02-14  [Irrigation].Apply(25);
                  2014-03-01  [Irrigation].Apply(25);
                  2014-03-15  [Irrigation].Apply(40);
                  2014-03-21  [Fertiliser].Apply(35, Fertiliser.Types.NO3N, 20);
                  2014-04-21  [Irrigation].Apply(25);
                  2014-05-18  [Irrigation].Apply(25);
                  2014-08-15  [Fertiliser].Apply(40, Fertiliser.Types.NO3N, 10);
                  2014-06-03  [Irrigation].Apply(25);
                  2014-06-19  [Irrigation].Apply(25);
                  2014-07-10  [Irrigation].Apply(30);
                  2014-08-01  [Irrigation].Apply(25);
                  2014-09-05  [Irrigation].Apply(30);
                  2014-09-22  [Irrigation].Apply(25);
                  2014-10-03  [Irrigation].Apply(40);
                  2014-10-17  [Irrigation].Apply(25);
                  2014-10-30  [Irrigation].Apply(40);
                  2014-11-14  [Irrigation].Apply(25);
                  2014-11-30  [Irrigation].Apply(25);
                Manager Harvesting
                  script: same as in Validation.New Zealand.WinterSowing2015.ABlock.paddock.Manager folder.Harvesting
                Manager SowAndCut
                  Cultivar = Coolibah
                  Management = 0
```csharp
using System;
using System.Collections.Generic;
using Models.Core;
using Models.PMF;
using Models.PMF.Interfaces;
using System.Xml.Serialization;
using APSIM.Shared.Utilities;

namespace Models
{
    [Serializable] 
    [System.Xml.Serialization.XmlInclude(typeof(Model))]
    public class Script : Model
    {
        [Link] Plant Oats;
        [Link] Clock Clock;

        [Description("Cultivar")]
        public string Cultivar { get; set; }
        [Description("Management")]
        public int Management { get; set; }

        private string SowDate;
        private string CutDate1;
        private string CutDate2;


        [XmlIgnore] private RemovalFractions Remove { get; set; }
        
        [EventSubscribe("Commencing")]
        private void OnSimulationCommencing(object sender, EventArgs e)
        {
            Remove = new RemovalFractions();
            if (Management == 1)
            {
            SowDate = "3-mar";
            CutDate1 = "";
            CutDate2 = "";
            }
            else if (Management == 2)
            {
            SowDate = "1-apr";
            CutDate1 = "";
            CutDate2 = "";
            }
            else if (Management == 3)
            {
            SowDate = "3-feb";
            CutDate1 = "1-jun";
            CutDate2 = "";
            }
            else if (Management == 4)
            {
            SowDate = "3-feb";
            CutDate1 = "24-mar";
            CutDate2 = "28-apr";
            }
            else if (Management == 5)
            {
            SowDate = "3-mar";
            CutDate1 = "28-apr";
            CutDate2 = "26-may";
            }
            else if (Management == 6)
            {
            SowDate = "1-apr";
            CutDate1 = "26-may";
            CutDate2 = "23-jun";
            }

        }
        
        [EventSubscribe("DoManagement")]
        private void OnDoManagement(object sender, EventArgs e)
        {

            if (DateUtilities.WithinDates(SowDate,Clock.Today,SowDate) )
            {
                Oats.Sow(population:95, cultivar: Cultivar, depth:40, rowSpacing:250);
            }

            //Set up  array of remove fractions to send with Cut method.  Each member in the array corresponds to an organ in the same order they are set up in.
            if (CutDate1 !="")
                if (DateUtilities.WithinDates(CutDate1,Clock.Today,CutDate1))
                {
                    //Remove.SetPhenologyStage = 2.0;
                    Remove.SetFractionToRemove("Panicle", 1.0);
                    Remove.SetFractionToResidue("Panicle", 0.0);
                    Remove.SetFractionToRemove("Leaf", 0.8);
                    Remove.SetFractionToResidue("Leaf", 0.0);
                    Remove.SetFractionToRemove("Stem", 0.8);
                    Remove.SetFractionToResidue("Stem", 0.0);
                    Remove.SetFractionToRemove("Grain", 1.0);
                    Remove.SetFractionToResidue("Grain", 0.0);
                    Remove.SetFractionToRemove("Root", 0.0);
                    Remove.SetFractionToResidue("Root", 0.0);
                    Oats.RemoveBiomass("Cut", Remove);
                }
            //Set up  array of remove fractions to send with Cut method.  Each member in the array corresponds to an organ in the same order they are set up in.
            if (CutDate2 !="")
                if (DateUtilities.WithinDates(CutDate2,Clock.Today,CutDate2))
                {
                    //Remove.SetPhenologyStage = 2.0;
                    Remove.SetFractionToRemove("Panicle", 1.0);
                    Remove.SetFractionToResidue("Panicle", 0.0);
                    Remove.SetFractionToRemove("Leaf", 0.8);
                    Remove.SetFractionToResidue("Leaf", 0.0);
                    Remove.SetFractionToRemove("Stem", 0.8);
                    Remove.SetFractionToResidue("Stem", 0.0);
                    Remove.SetFractionToRemove("Grain", 1.0);
                    Remove.SetFractionToResidue("Grain", 0.0);
                    Remove.SetFractionToRemove("Root", 0.0);
                    Remove.SetFractionToResidue("Root", 0.0);
                    Oats.RemoveBiomass("Cut", Remove);
                }

            
        }
    }
}
```
              Report DailyReport
              Report HarvestReport
              Report SupReport: same as Validation.Australia.Wellcamp2006.Wellcamp2006.Wellcamp2006Base.paddock.SupReport
        Experiment LRC2015
          Memo Experiment Description: same as Validation.New Zealand.RS_Oats_9899.Experiment Description
          Factors
            Factor Cv
              Specifications=[SowAndCut].Script.Cultivar = Algerian, Drover, Genie, Aladdin, Comet, Taipan, Wizard
            Factor Management: Specifications=[SowAndCut].Script.Management = 1 to 3 step 1
          Simulation LRC2015Base
            Clock: StartDate=2015-02-01; EndDate=2015-12-31
            Summary summaryfile
            Weather: FileName=Toowoomba_AP.met
            SoilArbitrator Soil Arbitrator
            Zone paddock: Area=1; Slope=0
              Soil: same as Validation.Australia.Wellcamp2006.Wellcamp2006.Wellcamp2006Base.paddock.Soil
              SoluteManager
              Irrigation
              SurfaceOrganicMatter Surface Organic Matter: same as Validation.New Zealand.RS_Oats_9899.Rainshelter.paddock.Surface Organic Matter
              Fertiliser
              MicroClimate: a_interception=0; b_interception=1; c_interception=0; d_interception=0; soil_albedo=0.3; sun_angle=15; soil_heat_flux_fraction=0.4; night_interception_fraction=0.5; refheight=2; albedo=0.293662; emissivity=0.96; RadIntTotal=0
              Plant Oats: CropType=Oats
              Folder Management
                Operations IrrigandFert
                  2015-02-01  [Irrigation].Apply(50);
                  2015-02-14  [Irrigation].Apply(25);
                  2015-03-10  [Irrigation].Apply(40);
                  2015-03-21  [Fertiliser].Apply(35, Fertiliser.Types.NO3N, 20);
                  2015-04-15  [Irrigation].Apply(25);
                  2015-05-21  [Irrigation].Apply(25);
                  2015-08-15  [Fertiliser].Apply(40, Fertiliser.Types.NO3N, 10);
                  2015-06-03  [Irrigation].Apply(25);
                  2015-06-23  [Irrigation].Apply(25);
                  2015-07-07  [Irrigation].Apply(30);
                  2015-07-21  [Irrigation].Apply(30);
                  2015-08-12  [Irrigation].Apply(25);
                  2015-09-14  [Irrigation].Apply(40);
                  2015-09-28  [Irrigation].Apply(40);
                  2015-10-16  [Irrigation].Apply(40);
                  2015-11-21  [Irrigation].Apply(25);
                Manager Harvesting
                  script: same as in Validation.New Zealand.WinterSowing2015.ABlock.paddock.Manager folder.Harvesting
                Manager SowAndCut
                  Cultivar = Coolibah
                  Management = 0
```csharp
using System;
using System.Collections.Generic;
using Models.Core;
using Models.PMF;
using Models.PMF.Interfaces;
using System.Xml.Serialization;
using APSIM.Shared.Utilities;

namespace Models
{
    [Serializable] 
    [System.Xml.Serialization.XmlInclude(typeof(Model))]
    public class Script : Model
    {
        [Link] Plant Oats;
        [Link] Clock Clock;

        [Description("Cultivar")]
        public string Cultivar { get; set; }
        [Description("Management")]
        public int Management { get; set; }

        private string SowDate;
        private string CutDate1;
        private string CutDate2;


        [XmlIgnore] private RemovalFractions Remove { get; set; }
        
        [EventSubscribe("Commencing")]
        private void OnSimulationCommencing(object sender, EventArgs e)
        {
            Remove = new RemovalFractions();
            if (Management == 1)
            {
            SowDate = "2-feb";
            CutDate1 = "";
            CutDate2 = "";
            }
            else if (Management == 2)
            {
            SowDate = "2-mar";
            CutDate1 = "";
            CutDate2 = "";
            }
            else if (Management == 3)
            {
            SowDate = "30-mar";
            CutDate1 = "";
            CutDate2 = "";
            }
            else if (Management == 4)
            {
            SowDate = "2-feb";
            CutDate1 = "30-mar";
            CutDate2 = "27-apr";
            }
            else if (Management == 5)
            {
            SowDate = "2-mar";
            CutDate1 = "27-apr";
            CutDate2 = "25-may";
            }
            else if (Management == 6)
            {
            SowDate = "30-mar";
            CutDate1 = "25-may";
            CutDate2 = "22-jun";
            }

        }
        
        [EventSubscribe("DoManagement")]
        private void OnDoManagement(object sender, EventArgs e)
        {

            if (DateUtilities.WithinDates(SowDate,Clock.Today,SowDate) )
            {
                Oats.Sow(population:95, cultivar: Cultivar, depth:40, rowSpacing:250);
            }

            //Set up  array of remove fractions to send with Cut method.  Each member in the array corresponds to an organ in the same order they are set up in.
            if (CutDate1 !="")
                if (DateUtilities.WithinDates(CutDate1,Clock.Today,CutDate1))
                {
                    //Remove.SetPhenologyStage = 2.0;
                    Remove.SetFractionToRemove("Panicle", 1.0);
                    Remove.SetFractionToResidue("Panicle", 0.0);
                    Remove.SetFractionToRemove("Leaf", 0.8);
                    Remove.SetFractionToResidue("Leaf", 0.0);
                    Remove.SetFractionToRemove("Stem", 0.8);
                    Remove.SetFractionToResidue("Stem", 0.0);
                    Remove.SetFractionToRemove("Grain", 1.0);
                    Remove.SetFractionToResidue("Grain", 0.0);
                    Remove.SetFractionToRemove("Root", 0.0);
                    Remove.SetFractionToResidue("Root", 0.0);
                    Oats.RemoveBiomass("Cut", Remove);
                }
            //Set up  array of remove fractions to send with Cut method.  Each member in the array corresponds to an organ in the same order they are set up in.
            if (CutDate2 !="")
                if (DateUtilities.WithinDates(CutDate2,Clock.Today,CutDate2))
                {
                    //Remove.SetPhenologyStage = 2.0;
                    Remove.SetFractionToRemove("Panicle", 1.0);
                    Remove.SetFractionToResidue("Panicle", 0.0);
                    Remove.SetFractionToRemove("Leaf", 0.8);
                    Remove.SetFractionToResidue("Leaf", 0.0);
                    Remove.SetFractionToRemove("Stem", 0.8);
                    Remove.SetFractionToResidue("Stem", 0.0);
                    Remove.SetFractionToRemove("Grain", 1.0);
                    Remove.SetFractionToResidue("Grain", 0.0);
                    Remove.SetFractionToRemove("Root", 0.0);
                    Remove.SetFractionToResidue("Root", 0.0);
                    Oats.RemoveBiomass("Cut", Remove);
                }

            
        }
    }
}
```
              Report DailyReport
              Report HarvestReport
              Report SupReport: same as Validation.Australia.Wellcamp2006.Wellcamp2006.Wellcamp2006Base.paddock.SupReport
        Experiment LRC2016
          Memo Experiment Description: same as Validation.New Zealand.RS_Oats_9899.Experiment Description
          Factors
            Factor Cv
              Specifications=[SowAndCut].Script.Cultivar = Algerian, Drover, Genie, Aladdin, Comet, Taipan, Wizard
            Factor Management: Specifications=[SowAndCut].Script.Management = 1 to 2 step 1
          Simulation LRC2016Base
            Clock: StartDate=2016-02-01; EndDate=2016-12-31
            Summary summaryfile
            Weather: FileName=Toowoomba_AP.met
            SoilArbitrator Soil Arbitrator
            Zone paddock: Area=1; Slope=0
              Soil: same as Validation.Australia.Wellcamp2006.Wellcamp2006.Wellcamp2006Base.paddock.Soil
              SoluteManager
              Irrigation
              SurfaceOrganicMatter Surface Organic Matter: same as Validation.New Zealand.RS_Oats_9899.Rainshelter.paddock.Surface Organic Matter
              Fertiliser
              MicroClimate: a_interception=0; b_interception=1; c_interception=0; d_interception=0; soil_albedo=0.3; sun_angle=15; soil_heat_flux_fraction=0.4; night_interception_fraction=0.5; refheight=2; albedo=0.293662; emissivity=0.96; RadIntTotal=0
              Plant Oats: CropType=Oats
              Folder Management
                Operations IrrigandFert
                  2016-02-01  [Irrigation].Apply(50);
                  2016-02-14  [Irrigation].Apply(25);
                  2016-03-01  [Irrigation].Apply(40);
                  2016-03-21  [Irrigation].Apply(25);
                  2016-03-21  [Fertiliser].Apply(35, Fertiliser.Types.NO3N, 20);
                  2016-04-08  [Irrigation].Apply(40);
                  2016-04-22  [Irrigation].Apply(40);
                  2016-05-06  [Irrigation].Apply(25);
                  2016-08-15  [Fertiliser].Apply(40, Fertiliser.Types.NO3N, 10);
                  2016-05-20  [Irrigation].Apply(25);
                  2016-07-21  [Irrigation].Apply(30);
                  2016-08-10  [Irrigation].Apply(25);
                  2016-09-02  [Irrigation].Apply(30);
                  2016-10-15  [Irrigation].Apply(25);
                  2016-10-30  [Irrigation].Apply(40);
                  2016-11-20  [Irrigation].Apply(40);
                Manager Harvesting
                  script: same as in Validation.New Zealand.WinterSowing2015.ABlock.paddock.Manager folder.Harvesting
                Manager SowAndCut
                  Cultivar = Coolibah
                  Management = 0
```csharp
using System;
using System.Collections.Generic;
using Models.Core;
using Models.PMF;
using Models.PMF.Interfaces;
using System.Xml.Serialization;
using APSIM.Shared.Utilities;

namespace Models
{
    [Serializable] 
    [System.Xml.Serialization.XmlInclude(typeof(Model))]
    public class Script : Model
    {
        [Link] Plant Oats;
        [Link] Clock Clock;

        [Description("Cultivar")]
        public string Cultivar { get; set; }
        [Description("Management")]
        public int Management { get; set; }

        private string SowDate;
        private string CutDate1;
        private string CutDate2;


        [XmlIgnore] private RemovalFractions Remove { get; set; }
        
        [EventSubscribe("Commencing")]
        private void OnSimulationCommencing(object sender, EventArgs e)
        {
            Remove = new RemovalFractions();
            if (Management == 1)
            {
            SowDate = "29-mar";
            CutDate1 = "";
            CutDate2 = "";
            }
            else if (Management == 2)
            {
            SowDate = "1-feb";
            CutDate1 = "29-mar";
            CutDate2 = "26-apr";
            }
            else if (Management == 3)
            {
            SowDate = "29-feb";
            CutDate1 = "26-apr";
            CutDate2 = "24-may";
            }
            else if (Management == 4)
            {
            SowDate = "29-mar";
            CutDate1 = "24-may";
            CutDate2 = "21-jun";
            }

        }
        
        [EventSubscribe("DoManagement")]
        private void OnDoManagement(object sender, EventArgs e)
        {

            if (DateUtilities.WithinDates(SowDate,Clock.Today,SowDate) )
            {
                Oats.Sow(population:95, cultivar: Cultivar, depth:40, rowSpacing:250);
            }

            //Set up  array of remove fractions to send with Cut method.  Each member in the array corresponds to an organ in the same order they are set up in.
            if (CutDate1 !="")
                if (DateUtilities.WithinDates(CutDate1,Clock.Today,CutDate1))
                {
                    //Remove.SetPhenologyStage = 2.0;
                    Remove.SetFractionToRemove("Panicle", 1.0);
                    Remove.SetFractionToResidue("Panicle", 0.0);
                    Remove.SetFractionToRemove("Leaf", 0.8);
                    Remove.SetFractionToResidue("Leaf", 0.0);
                    Remove.SetFractionToRemove("Stem", 0.8);
                    Remove.SetFractionToResidue("Stem", 0.0);
                    Remove.SetFractionToRemove("Grain", 1.0);
                    Remove.SetFractionToResidue("Grain", 0.0);
                    Remove.SetFractionToRemove("Root", 0.0);
                    Remove.SetFractionToResidue("Root", 0.0);
                    Oats.RemoveBiomass("Cut", Remove);
                }
            //Set up  array of remove fractions to send with Cut method.  Each member in the array corresponds to an organ in the same order they are set up in.
            if (CutDate2 !="")
                if (DateUtilities.WithinDates(CutDate2,Clock.Today,CutDate2))
                {
                    //Remove.SetPhenologyStage = 2.0;
                    Remove.SetFractionToRemove("Panicle", 1.0);
                    Remove.SetFractionToResidue("Panicle", 0.0);
                    Remove.SetFractionToRemove("Leaf", 0.8);
                    Remove.SetFractionToResidue("Leaf", 0.0);
                    Remove.SetFractionToRemove("Stem", 0.8);
                    Remove.SetFractionToResidue("Stem", 0.0);
                    Remove.SetFractionToRemove("Grain", 1.0);
                    Remove.SetFractionToResidue("Grain", 0.0);
                    Remove.SetFractionToRemove("Root", 0.0);
                    Remove.SetFractionToResidue("Root", 0.0);
                    Oats.RemoveBiomass("Cut", Remove);
                }

            
        }
    }
}
```
              Report DailyReport
              Report HarvestReport
              Report SupReport: same as Validation.Australia.Wellcamp2006.Wellcamp2006.Wellcamp2006Base.paddock.SupReport
        Experiment LRC2017
          Memo Experiment Description: same as Validation.New Zealand.RS_Oats_9899.Experiment Description
          Factors
            Factor Cv
              Specifications=[SowAndCut].Script.Cultivar = Algerian, Genie, Aladdin, Comet, Taipan, Wizard, Bond
            Factor Management: Specifications=[SowAndCut].Script.Management = 1 to 3 step 1
          Simulation LRC2017Base
            Clock: StartDate=2017-02-01; EndDate=2017-12-31
            Summary summaryfile
            Weather: FileName=Toowoomba_AP.met
            SoilArbitrator Soil Arbitrator
            Zone paddock: Area=1; Slope=0
              Soil: same as Validation.Australia.Wellcamp2006.Wellcamp2006.Wellcamp2006Base.paddock.Soil
              SoluteManager
              Irrigation
              SurfaceOrganicMatter Surface Organic Matter: same as Validation.New Zealand.RS_Oats_9899.Rainshelter.paddock.Surface Organic Matter
              Fertiliser
              MicroClimate: a_interception=0; b_interception=1; c_interception=0; d_interception=0; soil_albedo=0.3; sun_angle=15; soil_heat_flux_fraction=0.4; night_interception_fraction=0.5; refheight=2; albedo=0.293662; emissivity=0.96; RadIntTotal=0
              Plant Oats: CropType=Oats
              Folder Management
                Operations IrrigandFert
                  2017-02-01  [Irrigation].Apply(50);
                  2017-02-14  [Irrigation].Apply(25);
                  2017-03-21  [Fertiliser].Apply(35, Fertiliser.Types.NO3N, 20);
                  2017-04-22  [Irrigation].Apply(25);
                  2017-05-09  [Irrigation].Apply(25);
                  2017-08-15  [Fertiliser].Apply(40, Fertiliser.Types.NO3N, 10);
                  2017-05-24  [Irrigation].Apply(25);
                  2017-07-05  [Irrigation].Apply(30);
                  2017-07-25  [Irrigation].Apply(25);
                  2017-08-14  [Irrigation].Apply(25);
                  2017-08-29  [Irrigation].Apply(30);
                  2017-09-11  [Irrigation].Apply(25);
                  2017-09-25  [Irrigation].Apply(40);
                  2017-11-11  [Irrigation].Apply(25);
                Manager Harvesting
                  script: same as in Validation.New Zealand.WinterSowing2015.ABlock.paddock.Manager folder.Harvesting
                Manager SowAndCut
                  Cultivar = Coolibah
                  Management = 0
```csharp
using System;
using System.Collections.Generic;
using Models.Core;
using Models.PMF;
using Models.PMF.Interfaces;
using System.Xml.Serialization;
using APSIM.Shared.Utilities;

namespace Models
{
    [Serializable] 
    [System.Xml.Serialization.XmlInclude(typeof(Model))]
    public class Script : Model
    {
        [Link] Plant Oats;
        [Link] Clock Clock;

        [Description("Cultivar")]
        public string Cultivar { get; set; }
        [Description("Management")]
        public int Management { get; set; }

        private string SowDate;
        private string CutDate1;
        private string CutDate2;


        [XmlIgnore] private RemovalFractions Remove { get; set; }
        
        [EventSubscribe("Commencing")]
        private void OnSimulationCommencing(object sender, EventArgs e)
        {
            Remove = new RemovalFractions();
            if (Management == 1)
            {
            SowDate = "7-feb";
            CutDate1 = "";
            CutDate2 = "";
            }
            else if (Management == 2)
            {
            SowDate = "7-mar";
            CutDate1 = "";
            CutDate2 = "";
            }
            else if (Management == 3)
            {
            SowDate = "4-apr";
            CutDate1 = "";
            CutDate2 = "";
            }
            else if (Management == 4)
            {
            SowDate = "7-feb";
            CutDate1 = "4-apr";
            CutDate2 = "2-may";
            }
            else if (Management == 5)
            {
            SowDate = "7-mar";
            CutDate1 = "2-may";
            CutDate2 = "30-may";
            }
            else if (Management == 6)
            {
            SowDate = "4-apr";
            CutDate1 = "30-may";
            CutDate2 = "27-jun";
            }

        }
        
        [EventSubscribe("DoManagement")]
        private void OnDoManagement(object sender, EventArgs e)
        {

            if (DateUtilities.WithinDates(SowDate,Clock.Today,SowDate) )
            {
                Oats.Sow(population:95, cultivar: Cultivar, depth:40, rowSpacing:250);
            }

            //Set up  array of remove fractions to send with Cut method.  Each member in the array corresponds to an organ in the same order they are set up in.
            if (CutDate1 !="")
                if (DateUtilities.WithinDates(CutDate1,Clock.Today,CutDate1))
                {
                    //Remove.SetPhenologyStage = 2.0;
                    Remove.SetFractionToRemove("Panicle", 1.0);
                    Remove.SetFractionToResidue("Panicle", 0.0);
                    Remove.SetFractionToRemove("Leaf", 0.8);
                    Remove.SetFractionToResidue("Leaf", 0.0);
                    Remove.SetFractionToRemove("Stem", 0.8);
                    Remove.SetFractionToResidue("Stem", 0.0);
                    Remove.SetFractionToRemove("Grain", 1.0);
                    Remove.SetFractionToResidue("Grain", 0.0);
                    Remove.SetFractionToRemove("Root", 0.0);
                    Remove.SetFractionToResidue("Root", 0.0);
                    Oats.RemoveBiomass("Cut", Remove);
                }
            //Set up  array of remove fractions to send with Cut method.  Each member in the array corresponds to an organ in the same order they are set up in.
            if (CutDate2 !="")
                if (DateUtilities.WithinDates(CutDate2,Clock.Today,CutDate2))
                {
                    //Remove.SetPhenologyStage = 2.0;
                    Remove.SetFractionToRemove("Panicle", 1.0);
                    Remove.SetFractionToResidue("Panicle", 0.0);
                    Remove.SetFractionToRemove("Leaf", 0.8);
                    Remove.SetFractionToResidue("Leaf", 0.0);
                    Remove.SetFractionToRemove("Stem", 0.8);
                    Remove.SetFractionToResidue("Stem", 0.0);
                    Remove.SetFractionToRemove("Grain", 1.0);
                    Remove.SetFractionToResidue("Grain", 0.0);
                    Remove.SetFractionToRemove("Root", 0.0);
                    Remove.SetFractionToResidue("Root", 0.0);
                    Oats.RemoveBiomass("Cut", Remove);
                }

            
        }
    }
}
```
              Report DailyReport
              Report HarvestReport
              Report SupReport: same as Validation.Australia.Wellcamp2006.Wellcamp2006.Wellcamp2006Base.paddock.SupReport
  Folder Sensibility test folder
    Memo
      Say something here about the range of environments in Australia used to test the model
    Folder Sensibility test folder
      Memo
        Say something here about the range of environments in Australia used to test the model
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