Simulations: Version=57
  Memo TitlePage
    # The SimpleFruitTree model
    A simple representation of the shape and mass of rows of fruit trees which can be used in a multizone simulation with a row of mown grass to model the water N and C balance of an orchard system.
  Replacements
    Plant SimpleFruitTree: CropType=Slurp; IsEnding=false; DaysAfterEnding=0
      Memo TitlePage
        # SimpleFruitTree

        This model has been built using the Plant Modelling Framework (PMF) of [brown_plant_2014] to provide a simple representation of perennial tree and vine crops.  Its scope is intended for use in water and nitrogen balance studies where the focus is on soil processes and a very simple crop is adequate.  The model has simple functions for estimating the growht and nitrogen uptake of different organs and anohter simple function for predicting canopy size so water uptake can be predicted.

        The model has currently been parameterised and tested for 4 genotpes; Apple, Kiwifruit, Grape and Peach.

        SimpleFruitTree has a simple phenology model that breaks the annual growth cycle into 4 phases:

           1. The <b>Dormancy</b> phase when the tree is a bare trunk, using no water, growing no biomass and taking up no Nitrogen
           2. The <b>CanopyExpansion</b> phase which occurs in the spring when the bulk of biomass assimilation is partitioned to the new leaves with smaller proportions going to trunk and root growth
           3. The <b>FruitGrowth</b> phase where the bulk of biomass assimilation is partitioned to the growing fruit with smaller proportions going to leaf, trunk and root growth
           4. The <b>LeafFall</b> phase where any further biomass assimilated is partitioned to the trunk and roots.

        As infered above the SimpleFruitTree consists of 4 organs:

           1. <b>Leaf</b> which ls represented with the Simpleleaf class and provides estimates of:
            - Leaf area index that the MicroClimate model uses to estimate the radiation of the tree canopy and the grass in the underlying alley
            - Water uptake demand that the soil arbitrator uses to estimate soil water extraction
            - Photosynthesis estimates (Using radiation use efficiency) to drive tree biomass production
            - Biomass demand that is used to grow leaf biomass and determine N demand for leaf growth
           2. <b>Fruit</b> which represents the biomass and nitrogen that may be removed from the orchard each year as harvested product
           3. <b>Trunk</b> which represents the perennial biomass of the trees and will grow a small amount each year but is mostly pruned out at the end of the year and may be returned to the soil surface.
           4. <b>Root</b> which extracts water and nitrogen from the soil for plant growth, grows a small amount of biomass each year and senesesses a proportion of this to the soil.

        #Inclusion in APSIM simulations
        A SimpleFruitTree crop is included in a simulation the same as any other APSIM crop

         * The SimpleFruitTree object needs to be dragged or copied from the Crop folder in the tool box into the field of your simulation.
         * It is then planted with a sowing rule
        ~~~
        SimpleFruitTree.Sow(cultivar: StaticCrop, population: 1, depth: 10, rowSpacing: 150);
        ~~~

          * Note that the SimpleTreeModel has no notion of population or rowSpacing but these parameters are required by the Sow method so filler values are provided
          * `depth` in the Sow arguement is the depth that the crop is sown at.  In most cases the Sow argument is used to initialise an established tree crop so sow depth arguement is used to set the root depth of the trees.  This depth should be set to the rooting depth that is expected as roots will not grow during the simulation.

        #Representing and Orchard System
         * While the SimpleFruitTree model will run as a stand alone model, in most cases fruit trees and vines are grown in rows with a grass or herb ley growing in the alleys.  As such it is important to set up a simulation with two rectangular zones, one with the fruit tree established within and another with the pasture or herb ley established.  In most cases a SLURP is adequate to represent the energy, water and nitrogen balance of the alleys.
         * As part of the development of this crop model the Microclimate radiation arbitration was improved to be suitable for fruit crop set ups.  This involved modifying the strip crop radiation interception code to allow:
           1. The entire depth of the tallest (tree) canopy to be taller than the grass growing in the alleys
           2. The width of the canopy of the trees to exceed the width of the zone that the trees are planted in so they may intercept more radiation that would be possible if they were kept within the spatial confines of the row zone

        #Further development requirements
        The greatest effort has been spent on getting the models water balance predictions working to an adequate standard.  This included running an optimisation procedure against the validation data set to obtain the most suitalbe parameters for water extraction parameters (kl pattern through the soil) and water demand parameters (max canopy conductance and conductance response to light) as well as weather the roots of the alley should be allowed to grow sideways into the row.
        The model has been set up to predict biomass accumulation and N uptake but the parameters for this functionality have not be determined from observed or published data so further work is required here.  The rates of senescence of the FruitTree root system and the contribution of the mown grass in the alley to the N and C balance have not yet been established correctly.
      OrganArbitrator Arbitrator
        RelativeAllocation NArbitrator
        RelativeAllocation DMArbitrator
      Phenology
        Constant ThermalTime: FixedValue=1; Units=days
        GenericPhase ZeroPhase: Start=ModelInitialisation; End=Dormant
          Memo
            It is necessary to have a phase before Dormancy otherwise the rewind doesn't work
          VariableReference Progression: VariableName=[Phenology].ThermalTime.Value()
          Constant Target: FixedValue=0; Units=oCd
        DAWSPhase SpringDormancy: Start=Dormant; End=BudBreak; DAWStoProgress=30
        DAWSPhase CanopyExpansion: Start=BudBreak; End=StartFruitGrowth; DAWStoProgress=100
        DAWSPhase FruitGrowth: Start=StartFruitGrowth; End=FruitRipe; DAWStoProgress=300
        DAWSPhase LeafFall: Start=FruitRipe; End=BareTree; DAWStoProgress=340
        DAWSPhase WinterDormancy: Start=BareTree; End=SpringDormant; DAWStoProgress=365
        GotoPhase: Start=BareTree; End=Unused; PhaseNameToGoto=SpringDormancy
        Age
      Root: GrowthRespiration=0; MaintenanceRespiration=0; RootAngle=45; SWAvailabilityRatio=0
        MultiplyFunction RootFrontVelocity
          AirTemperatureFunction TemperatureEffect
            XYPairs: X=[0, 26, 35]; Y=[0, 1, 1]
          Constant Potential: FixedValue=0; Units=mm/d
          Constant DMConversionEfficiency: FixedValue=1
        Constant MaxDailyNUptake: FixedValue=1; Units=g/m2
        Constant DMConversionEfficiency: FixedValue=1; Units=g/m2
        Constant RemobilisationCost: FixedValue=0
        Constant MaximumRootDepth: FixedValue=3000; Units=mm
        Constant NitrogenDemandSwitch: FixedValue=1; Units=0-1
        Constant MaximumNConc: FixedValue=0.01
        Constant MinimumNConc: FixedValue=0.008
        LinearInterpolationFunction KLModifier: XProperty=[Root].LayerMidPointDepth
          XYPairs
            X=[0, 300, 600, 900, 1200, 1500, 1800, 2100, 2400, 2700, 3000]
            Y=[1, 1, 1, 1, 1, 1, 1, 1, 1, 1, 1]
          Memo Description
            This is important in SLURP as it is set for each species to represent their differences in rooting patterns between crop species
        Constant InitialDM: FixedValue=400; Units=g/plant
        Constant SenescenceRate: FixedValue=0; Units=/d
        Constant SpecificRootLength: FixedValue=105; Units=m/g
        LinearInterpolationFunction KNO3: XProperty=[Root].LengthDensity
          XYPairs: X=[0, 0.003]; Y=[0.02, 0.02]
        LinearInterpolationFunction KNH4: XProperty=[Root].LengthDensity
          XYPairs: X=[0, 0.003]; Y=[0, 0]
        BiomassRemoval BiomassRemovalDefaults
          OrganBiomassRemovalType Harvest: FractionLiveToRemove=0; FractionDeadToRemove=0; FractionLiveToResidue=0; FractionDeadToResidue=0
          OrganBiomassRemovalType Cut: FractionLiveToRemove=0; FractionDeadToRemove=0; FractionLiveToResidue=0; FractionDeadToResidue=0
          OrganBiomassRemovalType Prune: FractionLiveToRemove=0; FractionDeadToRemove=0; FractionLiveToResidue=0; FractionDeadToResidue=0
          OrganBiomassRemovalType Graze: FractionLiveToRemove=0; FractionDeadToRemove=0; FractionLiveToResidue=0; FractionDeadToResidue=0
        LinearInterpolationFunction NUptakeSWFactor: XProperty=[Root].RWC
          XYPairs: X=[0, 1]; Y=[0, 1]
        Constant CarbonConcentration: FixedValue=0.4
        Constant MaintenanceRespirationFunction: FixedValue=0
        BiomassDemand DMDemands
          MultiplyFunction Structural
            PartitionFractionDemandFunction DMDemandFunction
              PhaseLookup PartitionFraction
                PhaseLookupValue AcitveGrowth: Start=BudBreak; End=BareTree
                  Constant: FixedValue=0.2
            Constant StructuralFraction: FixedValue=1
          Constant Metabolic: FixedValue=0
          Constant Storage: FixedValue=0
        BiomassDemand NDemands
          MultiplyFunction Structural
            VariableReference MinNconc: VariableName=[Root].minimumNconc.Value()
            VariableReference PotentialDMAllocation: VariableName=[Root].potentialDMAllocation.Structural
          Constant Metabolic: FixedValue=0
          Constant Storage: FixedValue=0
      SimpleLeaf Leaf: CohortsInitialised=false; Albedo=0.018; Gsmax350=0.006; R50=100; MicroClimatePresent=true; LeafInitialisationStage=BudBreak
        zero: ApicalCohortNo, InitialisedCohortNo, TipsAtEmergence, CohortsAtInitialisation, AppearedCohortNo, PlantAppearedLeafNo, Height, BaseHeight, Width, FRGR, PotentialEP, WaterDemand, KDead, LAIDead
        Constant StomatalConductanceCO2Modifier: FixedValue=1
        Constant DetachmentRateFunction: FixedValue=0; Units=/d
        Constant RemobilisationCost: FixedValue=0
        MultiplyFunction InitialWtFunction
          Constant InitialPlantWt: FixedValue=0; Units=g/plant
          VariableReference Population: VariableName=[Plant].Population
        Constant LaiDeadFunction: FixedValue=0; Units=m^2/m^2
        RUEModel Photosynthesis
          Constant RUE: FixedValue=1.2
          WeightedTemperatureFunction FT: MaximumTemperatureWeighting=0.5
            XYPairs: X=[0, 10, 25, 40]; Y=[0, 1, 1, 0]
          LinearInterpolationFunction FW: XProperty=[Leaf].Fw
            XYPairs: X=[0, 0.6, 1.5]; Y=[1, 1, 1]
          RUECO2Function FCO2: PhotosyntheticPathway=C3
          VariableReference RadnInt: VariableName=[Leaf].RadIntTot
          Constant FVPD: FixedValue=1
          Constant FN: FixedValue=1
        AirTemperatureFunction FRGRFunction
          XYPairs: X=[0, 10, 25, 40]; Y=[0, 1, 1, 0]
        Constant MaximumNConc: FixedValue=0.05; Units=g/g
        Constant MinimumNConc: FixedValue=0.04; Units=g/g
        MultiplyFunction LAIFunction
          LinearInterpolationFunction SeasonalLAIPattern: XProperty=[Weather].DaysSinceWinterSolstice
            XYPairs: X=[0, 90, 140, 200, 295, 330, 365]; Y=[0, 0, 3.85, 6.68, 8.94, 0, 0]
          LinearInterpolationFunction AgeFactor: XProperty=[Phenology].Age.Years
            XYPairs: X=[0, 6]; Y=[0.05, 1]
          Constant FrostFactor: FixedValue=1
        Constant ExtinctionCoefficientFunction: FixedValue=0.7
        MultiplyFunction HeightFunction
          LinearInterpolationFunction SeasonalHeightPattern: XProperty=[Weather].DaysSinceWinterSolstice
            XYPairs: X=[0, 140, 250, 360, 361]; Y=[2800, 2800, 3500, 3500, 2800]
          LinearInterpolationFunction AgeFactor: XProperty=[Phenology].Age.Years
            XYPairs: X=[0, 6]; Y=[0.1, 1]
        Constant NReallocationFactor: FixedValue=0
        PhaseLookup SenescenceRate
          PhaseLookupValue LeafFall: Start=FruitRipe; End=BareTree
            Constant: FixedValue=0
        BiomassRemoval BiomassRemovalDefaults
          OrganBiomassRemovalType Harvest: FractionLiveToRemove=0; FractionDeadToRemove=0; FractionLiveToResidue=0; FractionDeadToResidue=0
          OrganBiomassRemovalType Cut: FractionLiveToRemove=0; FractionDeadToRemove=0; FractionLiveToResidue=0; FractionDeadToResidue=0
          OrganBiomassRemovalType Prune: FractionLiveToRemove=0; FractionDeadToRemove=0; FractionLiveToResidue=1; FractionDeadToResidue=1
          OrganBiomassRemovalType Graze: FractionLiveToRemove=0; FractionDeadToRemove=0; FractionLiveToResidue=0; FractionDeadToResidue=0
        Constant MaintenanceRespirationFunction: FixedValue=0; Units=0-1
        Constant DMConversionEfficiency: FixedValue=1; Units=0-1
        Constant NRetranslocationFactor: FixedValue=0
        Constant NitrogenDemandSwitch: FixedValue=1
        Constant DMReallocationFactor: FixedValue=0
        Constant DMRetranslocationFactor: FixedValue=0
        VariableReference CriticalNConc: VariableName=[Leaf].MinimumNConc.Value()
        Constant CarbonConcentration: FixedValue=0.4
        BiomassDemand DMDemands
          MultiplyFunction Structural
            PartitionFractionDemandFunction DMDemandFunction
              PhaseLookup PartitionFraction
                PhaseLookupValue CanopyExpansion: Start=BudBreak; End=StartFruitGrowth
                  Constant: FixedValue=0.6
                PhaseLookupValue FruitGrowth: Start=StartFruitGrowth; End=FruitRipe
                  Constant: FixedValue=0.1
            Constant StructuralFraction: FixedValue=0.5; Units=0-1
          Constant Metabolic: FixedValue=0
          StorageDMDemandFunction Storage
            SubtractFunction StorageFraction
              Constant One: FixedValue=1
              VariableReference StructuralFraction: VariableName=[Leaf].DMDemands.Structural.StructuralFraction.Value()
        BiomassDemand NDemands
          MultiplyFunction Structural
            VariableReference MinNconc: VariableName=[Leaf].minimumNconc.Value()
            VariableReference PotentialDMAllocation: VariableName=[Leaf].potentialDMAllocation.Structural
          StorageNDemandFunction Storage
            VariableReference NitrogenDemandSwitch: VariableName=[Leaf].nitrogenDemandSwitch.Value()
            VariableReference MaxNconc: VariableName=[Leaf].maximumNconc.Value()
          Constant Metabolic: FixedValue=0
        Constant BaseHeightFunction: FixedValue=900; Units=mm
        MultiplyFunction WidthFunction
          LinearInterpolationFunction SeasonalWidthPattern: XProperty=[Weather].DaysSinceWinterSolstice
            XYPairs: X=[0, 140, 250, 360, 361]; Y=[1000, 1000, 2000, 2000, 1000]
          LinearInterpolationFunction AgeFactor: XProperty=[Phenology].Age.Years
            XYPairs: X=[0, 5]; Y=[0.4, 1]
      GenericOrgan Trunk
        Constant NReallocationFactor: FixedValue=0
        Constant NRetranslocationFactor: FixedValue=0
        Constant DMRetranslocationFactor: FixedValue=0
        Constant MaximumNConc: FixedValue=0.01
        Constant MinimumNConc: FixedValue=0.005
        PhaseBasedSwitch NitrogenDemandSwitch: Start=BudBreak; End=BareTree
        BiomassRemoval BiomassRemovalDefaults
          OrganBiomassRemovalType Harvest: FractionLiveToRemove=0; FractionDeadToRemove=0; FractionLiveToResidue=0; FractionDeadToResidue=0
          OrganBiomassRemovalType Cut: FractionLiveToRemove=0; FractionDeadToRemove=0; FractionLiveToResidue=0; FractionDeadToResidue=0
          OrganBiomassRemovalType Prune: FractionLiveToRemove=0; FractionDeadToRemove=0; FractionLiveToResidue=0.3; FractionDeadToResidue=0.9
          OrganBiomassRemovalType Graze: FractionLiveToRemove=0; FractionDeadToRemove=0; FractionLiveToResidue=0; FractionDeadToResidue=0
        Constant InitialWtFunction: FixedValue=500; Units=g/m^2
        Constant SenescenceRate: FixedValue=0; Units=/d
        Constant DetachmentRateFunction: FixedValue=0; Units=/d
        Constant MaintenanceRespirationFunction: FixedValue=0; Units=0-1
        Constant DMConversionEfficiency: FixedValue=1; Units=0-1
        Constant DMReallocationFactor: FixedValue=0
        VariableReference CriticalNConc: VariableName=[Stem].MinimumNConc.Value()
        Constant RemobilisationCost: FixedValue=0
        Constant CarbonConcentration: FixedValue=0.4
        BiomassDemand DMDemands
          PartitionFractionDemandFunction Structural
            PhaseLookup PartitionFraction
              PhaseLookupValue CanopyExpansion: Start=BudBreak; End=StartFruitGrowth
                Constant: FixedValue=0.2
              PhaseLookupValue FruitGrowth: Start=StartFruitGrowth; End=FruitRipe
                Constant: FixedValue=0.15
              PhaseLookupValue LeafFall: Start=FruitRipe; End=BareTree
                Constant: FixedValue=0.8
          Constant Metabolic: FixedValue=0
          Constant Storage: FixedValue=0
        BiomassDemand NDemands
          Constant Storage: FixedValue=0
          Constant Metabolic: FixedValue=0
          MultiplyFunction Structural
            VariableReference MinNconc: VariableName=[Trunk].minimumNconc.Value()
            VariableReference PotentialDMAllocation: VariableName=[Trunk].potentialDMAllocation.Structural
        RetranslocateNonStructural RetranslocateNitrogen
      GenericOrgan Fruit
        Constant NReallocationFactor: FixedValue=0
        Constant NRetranslocationFactor: FixedValue=0
        Constant DMRetranslocationFactor: FixedValue=0
        Constant MaximumNConc: FixedValue=0.03
        Constant MinimumNConc: FixedValue=0.025
        PhaseBasedSwitch NitrogenDemandSwitch: Start=StartFruitGrowth; End=FruitRipe
        BiomassRemoval BiomassRemovalDefaults
          OrganBiomassRemovalType Harvest: FractionLiveToRemove=0.8; FractionDeadToRemove=0; FractionLiveToResidue=0.2; FractionDeadToResidue=0
          OrganBiomassRemovalType Cut: FractionLiveToRemove=0; FractionDeadToRemove=0; FractionLiveToResidue=0; FractionDeadToResidue=0
          OrganBiomassRemovalType Prune: FractionLiveToRemove=0; FractionDeadToRemove=0; FractionLiveToResidue=1; FractionDeadToResidue=1
          OrganBiomassRemovalType Graze: FractionLiveToRemove=0; FractionDeadToRemove=0; FractionLiveToResidue=0; FractionDeadToResidue=0
        Constant InitialWtFunction: FixedValue=0; Units=g/m^2
        Constant SenescenceRate: FixedValue=0; Units=/d
        Constant DetachmentRateFunction: FixedValue=0; Units=/d
        Constant MaintenanceRespirationFunction: FixedValue=0; Units=0-1
        Constant DMConversionEfficiency: FixedValue=1; Units=0-1
        Constant DMReallocationFactor: FixedValue=0
        VariableReference CriticalNConc: VariableName=[Stem].MinimumNConc.Value()
        Constant RemobilisationCost: FixedValue=0
        Constant CarbonConcentration: FixedValue=0.4
        BiomassDemand DMDemands
          PartitionFractionDemandFunction Structural
            PhaseLookup PartitionFraction
              PhaseLookupValue FruitGrowth: Start=StartFruitGrowth; End=FruitRipe
                MultiplyFunction Fraction
                  Constant Proportion: FixedValue=0.55
                  Constant NotHarvested: FixedValue=0.55
          Constant Metabolic: FixedValue=0
          Constant Storage: FixedValue=0
        BiomassDemand NDemands
          Constant Storage: FixedValue=0
          Constant Metabolic: FixedValue=0
          MultiplyFunction Structural
            VariableReference MinNconc: VariableName=[Trunk].minimumNconc.Value()
            VariableReference PotentialDMAllocation: VariableName=[Fruit].potentialDMAllocation.Structural
        RetranslocateNonStructural RetranslocateNitrogen
      Cultivar Apple
        Command:
          [Leaf].HeightFunction.SeasonalHeightPattern.XYPairs.X= 0   , 125, 250, 360, 361
          [Leaf].HeightFunction.SeasonalHeightPattern.XYPairs.Y= 2800,2800,3500,3500,2800
          [Leaf].HeightFunction.AgeFactor.XYPairs.X = 1,6
          [Leaf].HeightFunction.AgeFactor.XYPairs.Y = 0.1,1
          [Leaf].LAIFunction.SeasonalLAIPattern.XYPairs.X = 70,125,305,330
          [Leaf].LAIFunction.SeasonalLAIPattern.XYPairs.Y = 0 ,7.6,7.6,  0
          [Leaf].LAIFunction.AgeFactor.XYPairs.X = 0,6
          [Leaf].LAIFunction.AgeFactor.XYPairs.Y = 0.2,1
          [Leaf].ExtinctionCoefficientFunction.FixedValue = 0.6
          [Leaf].BaseHeightFunction.FixedValue = 800
          [Leaf].WidthFunction.SeasonalWidthPattern.XYPairs.X= 70  , 125, 360, 361
          [Leaf].WidthFunction.SeasonalWidthPattern.XYPairs.Y= 1300,1600,1600,1300
          [Leaf].WidthFunction.AgeFactor.XYPairs.X = 1,6
          [Leaf].WidthFunction.AgeFactor.XYPairs.Y = 0.1,1
          [Leaf].Gsmax350 = 0.008
        Memo Description
          The parameters for this crop were derived from a golden queen peach orchard.
      Cultivar Kiwifruit
        Command:
          [Leaf].HeightFunction.SeasonalHeightPattern.XYPairs.X= 65,  230,350,365
          [Leaf].HeightFunction.SeasonalHeightPattern.XYPairs.Y= 1800,2400,2400,1800
          [Leaf].HeightFunction.AgeFactor.XYPairs.X = 1,3
          [Leaf].HeightFunction.AgeFactor.XYPairs.Y = 0.7,1
          [Leaf].LAIFunction.SeasonalLAIPattern.XYPairs.X = 65, 130, 200, 330,360
          [Leaf].LAIFunction.SeasonalLAIPattern.XYPairs.Y = 0 ,2.74,3.74,3.74,  0
          [Leaf].LAIFunction.AgeFactor.XYPairs.X = 0,3
          [Leaf].LAIFunction.AgeFactor.XYPairs.Y = 0.7,1
          [Leaf].ExtinctionCoefficientFunction.FixedValue = 0.8
          [Leaf].BaseHeightFunction.FixedValue = 1800
          [Leaf].WidthFunction.SeasonalWidthPattern.XYPairs.X= 110,230,  320,321
          [Leaf].WidthFunction.SeasonalWidthPattern.XYPairs.Y= 5000,5000,5000,5000
          [Leaf].WidthFunction.AgeFactor.XYPairs.X = 1,3
          [Leaf].WidthFunction.AgeFactor.XYPairs.Y = 0.7,1
          [Leaf].Gsmax350 = 0.003
        Memo Description
          The parameters for this crop were derived from a vineyard.
      Cultivar Grape_4Cane
        Command:
          [Leaf].HeightFunction.SeasonalHeightPattern.XYPairs.X= 70,75 ,230 ,320 ,321
          [Leaf].HeightFunction.SeasonalHeightPattern.XYPairs.Y= 900,1100,2200,2200,900
          [Leaf].HeightFunction.AgeFactor.XYPairs.X = 1,3
          [Leaf].HeightFunction.AgeFactor.XYPairs.Y = 0.7,1
          [Leaf].LAIFunction.SeasonalLAIPattern.XYPairs.X = 70,200,280,310,330
          [Leaf].LAIFunction.SeasonalLAIPattern.XYPairs.Y = 0  ,9,9,  6,  0
          [Leaf].LAIFunction.AgeFactor.XYPairs.X = 0,3
          [Leaf].LAIFunction.AgeFactor.XYPairs.Y =  0.7,1
          [Leaf].ExtinctionCoefficientFunction.FixedValue = 0.7
          [Leaf].BaseHeightFunction.FixedValue = 900
          [Leaf].WidthFunction.SeasonalWidthPattern.XYPairs.X= 70,230,  320,321
          [Leaf].WidthFunction.SeasonalWidthPattern.XYPairs.Y= 300,700,700,300
          [Leaf].WidthFunction.AgeFactor.XYPairs.X = 1,3
          [Leaf].WidthFunction.AgeFactor.XYPairs.Y = 0.7,1
          [Leaf].Gsmax350 = 0.006
        Memo Description
          The parameters for this crop were derived from a vineyard.
      Cultivar Grape_2Cane
        Command:
          [Leaf].HeightFunction.SeasonalHeightPattern.XYPairs.X= 70,230,  320,321
          [Leaf].HeightFunction.SeasonalHeightPattern.XYPairs.Y= 900,2200,2200,900
          [Leaf].HeightFunction.AgeFactor.XYPairs.X = 1,3
          [Leaf].HeightFunction.AgeFactor.XYPairs.Y = 0.7,1
          [Leaf].LAIFunction.SeasonalLAIPattern.XYPairs.X = 70,200,250,310,330
          [Leaf].LAIFunction.SeasonalLAIPattern.XYPairs.Y = 0  ,6.8,6.8,  5,  0
          [Leaf].LAIFunction.AgeFactor.XYPairs.X = 0,3
          [Leaf].LAIFunction.AgeFactor.XYPairs.Y = 0.7,1
          [Leaf].ExtinctionCoefficientFunction.FixedValue = 0.7
          [Leaf].BaseHeightFunction.FixedValue = 900
          [Leaf].WidthFunction.SeasonalWidthPattern.XYPairs.X= 70,230,  320,321
          [Leaf].WidthFunction.SeasonalWidthPattern.XYPairs.Y= 300,700,700,300
          [Leaf].WidthFunction.AgeFactor.XYPairs.X = 1,3
          [Leaf].WidthFunction.AgeFactor.XYPairs.Y = 0.7,1
          [Leaf].Gsmax350 = 0.006
        Memo Description
          The parameters for this crop were derived from a vineyard.
      Cultivar Peach
        Command:
          [Leaf].HeightFunction.SeasonalHeightPattern.XYPairs.X= 0   , 140, 250, 360, 361
          [Leaf].HeightFunction.SeasonalHeightPattern.XYPairs.Y= 2800,2800,3500,3500,2800
          [Leaf].HeightFunction.AgeFactor.XYPairs.X = 1,6
          [Leaf].HeightFunction.AgeFactor.XYPairs.Y = 0.1,1
          [Leaf].LAIFunction.SeasonalLAIPattern.XYPairs.X = 90,140,200,295,330
          [Leaf].LAIFunction.SeasonalLAIPattern.XYPairs.Y = 0,2.9,5.0,6.7,0
          [Leaf].LAIFunction.AgeFactor.XYPairs.X = 0,6
          [Leaf].LAIFunction.AgeFactor.XYPairs.Y = 0.2,1
          [Leaf].ExtinctionCoefficientFunction.FixedValue = 0.6
          [Leaf].BaseHeightFunction.FixedValue = 800
          [Leaf].WidthFunction.SeasonalWidthPattern.XYPairs.X= 0   , 140, 250, 360, 361
          [Leaf].WidthFunction.SeasonalWidthPattern.XYPairs.Y= 2400,2400,3000,3000,2400
          [Leaf].WidthFunction.AgeFactor.XYPairs.X = 1,6
          [Leaf].WidthFunction.AgeFactor.XYPairs.Y = 0.1,1
          [Leaf].Gsmax350 = 0.002
        Memo Description
          The parameters for this crop were derived from a golden queen peach orchard.
      CompositeBiomass AboveGround: DMDOfStructural=0.6
        Propertys=[[Leaf].Live, [Leaf].Dead, [Trunk].Live, [Trunk].Dead, [Fruit].Live, [Fruit].Dead]
      CompositeBiomass Total: DMDOfStructural=0.6
        Propertys=[[Leaf].Live, [Leaf].Dead, [Trunk].Live, [Trunk].Dead, [Fruit].Live, [Fruit].Dead, [Root].Live, [Root].Dead]
      CompositeBiomass TotalLive: Propertys=[[Leaf].Live, [Trunk].Live, [Fruit].Live, [Root].Live]; DMDOfStructural=0.6
      CompositeBiomass TotalDead: Propertys=[[Leaf].Dead, [Trunk].Dead, [Fruit].Dead, [Root].Dead]; DMDOfStructural=0.6
    Report: EventNames=[Clock].DoReport
      VariableNames:
        [Clock].Today
        [PlantVariables].Script.Height as height
        [PlantVariables].Script.LAI as lai
        [PlantVariables].Script.FRadInt as f.rad.int
        [PlantVariables].Script.ET as transpiration
        [PlantVariables].Script.ES as Es
        [PlantVariables].Script.PET as PET
        [PlantVariables].Script.RootDepth as rootDepth
        [Soil].OutputLayers.SW
        sum([Soil].OutputLayers.SWmm) as psw
        [Weather].DaysSinceWinterSolstice
        [Weather].Rain
        [Irrigation].IrrigationApplied
        [Soil].SoilWater.Drainage
        [SimpleFruitTree].Leaf.Total.Wt
        [SimpleFruitTree].Leaf.Total.N
        [SimpleFruitTree].Trunk.Total.Wt
        [SimpleFruitTree].Trunk.Total.N
        [SimpleFruitTree].Fruit.Total.Wt
        [SimpleFruitTree].Fruit.Total.N
        [SimpleFruitTree].Root.Total.Wt
        [SimpleFruitTree].Root.Total.N
        [SimpleFruitTree].Leaf.DMSupply.Fixation
        [SimpleFruitTree].Phenology.Stage
        [SimpleFruitTree].Phenology.CurrentStageName
        [Weather].DaysSinceWinterSolstice
    Manager PlantVariables
      FRadInt = 0
      ET = 0
      ES = 0
      PET = 0
      LAI = 0
      Height = 0
      RootDepth = 0
      PlantWidth = 0
```csharp
using System;
using Models.Core;
using Models.PMF;
using System.Collections.Generic;
using Models.Soils;
using APSIM.Shared.Utilities;
using Models.Zones;

namespace Models
{
    [Serializable]
    public class Script : Model
    {
        [Link] Weather weather = null;
        private RectangularZone AlleyZone {get; set; }
        private RectangularZone RowZone {get; set;}
        private RectangularZone ThisZone {get; set;}
        private double AreaWidth {get; set;}

        public double FRadInt {get; set;}
        public double ET {get; set;}
        public double ES {get; set;}
        public double PET {get; set;}
        public double LAI {get; set;}
        public double Height {get; set;}
        public double RootDepth {get; set;}
        public double PlantWidth {get; set;}

        [EventSubscribe("StartOfSimulation")]
        private void DoStartOfSimulation(object sender, EventArgs e)
        {
        	   
        	   ThisZone = this.Parent.Parent as RectangularZone;
               RowZone = Apsim.Find(this.Parent.Parent.Parent,"Row") as RectangularZone;
               AlleyZone = (RectangularZone)Apsim.Find(this.Parent.Parent.Parent,"Alley") as RectangularZone;
               AreaWidth = AlleyZone.Width + RowZone.Width;
               PlantWidth = 0;
        }
        
        [EventSubscribe("DoReportCalculations")]
        private void OnDoReportCalculations(object sender, EventArgs e)
        {
        	if (ThisZone.Name == "Row")
	        	{
	        	FRadInt = ((double)RowZone.Get("SimpleFruitTree.Leaf.RadIntTot") * RowZone.Width)/(weather.Radn * AreaWidth);
	        	ET = (double)RowZone.Get("SimpleFruitTree.Leaf.Transpiration") * RowZone.Width/AreaWidth;
	        	LAI = (double)RowZone.Get("SimpleFruitTree.Leaf.LAI");
	        	Height = (double)RowZone.Get("SimpleFruitTree.Leaf.Height");
	        	RootDepth = (double)RowZone.Get("SimpleFruitTree.Root.Depth");
	        	PlantWidth = (double)RowZone.Get("SimpleFruitTree.Leaf.Width");
	        	}
        	else
        		{
        		FRadInt = ((double)AlleyZone.Get("Slurp.Leaf.RadIntTot") * ThisZone.Width)/ (weather.Radn * AreaWidth);
                ET = (double)AlleyZone.Get("Slurp.Leaf.Transpiration") * ThisZone.Width/AreaWidth;
                LAI = (double)AlleyZone.Get("Slurp.Leaf.LAI");
	        	Height = (double)AlleyZone.Get("Slurp.Leaf.Height");
	        	RootDepth = (double)AlleyZone.Get("Slurp.Root.Depth");
                }

        	ES = (double)ThisZone.Get("Soil.SoilWater.Es") * ThisZone.Width/AreaWidth;
        	double PETWidth = Math.Min(Math.Max(PlantWidth,ThisZone.Width),AreaWidth);
        	PET = (double)ThisZone.Get("Soil.SoilWater.Eo") * PETWidth/AreaWidth;
        }
    }
}
```
  DataStore
    ExcelInput: FileName=AllObs.xlsx; SheetNames=[Observed]
    PredictedObserved: PredictedTableName=Report; ObservedTableName=Observed; FieldNameUsedForMatch=Zone; FieldName2UsedForMatch=Clock.Today
    PredictedObserved DrainagePO: PredictedTableName=Drainage; ObservedTableName=Observed; FieldNameUsedForMatch=Zone; FieldName2UsedForMatch=Clock.Today
  Simulation Peach
    Clock: StartDate=2007-07-01; EndDate=2011-07-01
    Summary SummaryFile
    Weather: FileName=Whakatu.met
    MicroClimate: a_interception=0; b_interception=1; c_interception=0; d_interception=0; soil_albedo=0.3; SoilHeatFluxFraction=0.4; NightInterceptionFraction=0.5; ReferenceHeight=2
    SoilArbitrator Soil Arbitrator
    RectangularZone Row: Length=100; Width=1; Slope=0
      Report: EventNames=[Clock].DoReport
      Report Drainage: EventNames=[Clock].DoReport
        VariableNames:
          [Clock].Today
          sum of [Soil].SoilWater.Flux[6] from 2009-01-21 to 2011-04-14 as drainage
      Soil: Latitude=0; Longitude=0
        LayerStructure: Thickness=[200, 200, 200, 200, 200, 200, 400, 400, 400, 600]
        Analysis: Thickness=[100, 200, 300, 300, 300, 300]; PH=[6.6, 6.2, 5.7, 5.5, 5.5, 5.5]; PHUnits=Water; BoronUnits=0
        InitialWater Initial water: PercentMethod=1; FractionFull=1
        Water
          Thickness  BD  AirDry  LL15  DUL   SAT
          400        1   0.009   0.18  0.38  0.5
          400        1   0.18    0.18  0.36  0.48
          400        1   0.18    0.2   0.42  0.54
          1800       1   0.2     0.2   0.42  0.54
          SoilCrop SimpleFruitTreeSoil: LL=[0.18, 0.18, 0.2, 0.2]; KL=[1, 1, 1, 1]; XF=[1, 1, 1, 1]
          SoilCrop SlurpSoil: LL=[0.18, 0.18, 0.2, 0.2]; KL=[0.11, 0.11, 0.11, 0.11]; XF=[1, 1, 1, 1]
        SoilWater: SummerDate=1-Nov; SummerU=9; SummerCona=4.4; WinterDate=1-Apr; WinterU=9; WinterCona=4.4; DiffusConst=88; DiffusSlope=35.4; Salb=0.18; CN2Bare=68; CNRed=20; CNCov=0.8; slope=0; discharge_width=0; catchment_area=0; max_pond=0; ResidueInterception=0
          Thickness  SWCON  KLAT
          150        0.55   0
          150        0.55   0
          100        0.55   0
          200        0.55   0
          200        0.55   0
          200        0.55   0
          200        0.55   0
          200        0.55   0
          200        0.55   0
          200        0.55   0
          200        0.55   0
          200        0.55   0
          400        0.55   0
        SoilNitrogen: fom_types=[default, manure, mucuna, lablab, shemp, stable]; fract_carb=[0.2, 0.3, 0.54, 0.57, 0.45, 0]; fract_cell=[0.7, 0.3, 0.37, 0.37, 0.47, 0.1]; fract_lign=[0.1, 0.4, 0.09, 0.06, 0.08, 0.9]
          SoilNitrogenNO3 NO3
          SoilNitrogenNH4 NH4
          SoilNitrogenUrea Urea
          SoilNitrogenPlantAvailableNO3 PlantAvailableNO3
          SoilNitrogenPlantAvailableNH4 PlantAvailableNH4
        SoilOrganicMatter: RootCN=30; EnrACoeff=7.4; EnrBCoeff=0.2; OCUnits=Total
          Thickness  OC    SoilCN  FBiom  FInert  RootWt
          100        1.82  11.5    0.025  0.3     1243.93
          200        1.47  11.5    0.025  0.4     833.832
          300        1.2   11.5    0.015  0.75    457.617
          300        1.03  11.5    0.01   0.9     251.145
          300        0.47  11.5    0.01   0.96    137.831
          300        0.47  11.5    0.01   0.96    75.6435
        Sample Initial nitrogen: NO3Units=kg/ha; NH4Units=ppm; SWUnits=Volumetric; OCUnits=Total; PHUnits=Water
          Thickness  NO3  NH4
          100        217  0
          200        30   0
          300        5    0
          300        5    0
          300        0    0
          300        0    0
        CERESSoilTemperature
        OutputLayers: Thickness=[400, 400, 400]
      SurfaceOrganicMatter: InitialResidueName=wheat_stubble; InitialResidueType=wheat; InitialResidueMass=500; InitialStandingFraction=0; InitialCPR=0; InitialCNR=100; FractionFaecesAdded=0.5
      Plant SimpleFruitTree: CropType=Slurp; IsEnding=false; DaysAfterEnding=0
      Fertiliser
      Irrigation
      Manager TreeInitialisation
        CultivarName = Peach
        SowingDate = 2007-07-01
        StartAge = 6
        SurfaceKL = 0.2
        KLReductionFactor = 0.003
        KLReductionDepth = 150
        YKLModifiers =
        XDepth =
```csharp
using System;
using Models.Core;
using Models.PMF;
using APSIM.Shared.Utilities;
using Models.Soils;
        
namespace Models
{
    [Serializable] 
    [System.Xml.Serialization.XmlInclude(typeof(Model))]
    public class Script : Model
    {
        [Link] Plant SimpleFruitTree;
        [Link] Clock Clock;
        [Link] Soil Soil;
        [Link] Zone zone;

        [Display(Type = DisplayType.CultivarName)]
        [Description("Plant Type")]
        public string CultivarName { get; set; }
        [Description("Initialisation Date")]
        public DateTime SowingDate { get; set; }
        [Description("Age of trees (in Years) at start of simulation)")]
        public int StartAge {get;set;}

        [Description("Kl in the shallowest layer")]
        public double SurfaceKL { get; set; }
        [Description("Factor to change Kl modifier with Depth")]
        public double KLReductionFactor { get; set; }
        [Description("Depth that KL starts to decline")]
        public double KLReductionDepth { get; set; }
        
        public double[] YKLModifiers { get; set; }
        public double[] XDepth { get; set; }
        private double Depth { get; set; }
        
        [EventSubscribe("DoManagement")]
        private void OnDoManagement(object sender, EventArgs e)
        {
            if (Clock.Today.Date == SowingDate)
            {
            	double maxRootDepth = (double)zone.Get("SimpleFruitTree.Root.MaximumRootDepth.FixedValue");
            	double initialRootDepth = Math.Min(1,StartAge/6) * maxRootDepth;
                SimpleFruitTree.Sow(cultivar: CultivarName, population: 1, depth: initialRootDepth, rowSpacing: 3000);
                object StartAgeValue = StartAge;
                zone.Set("SimpleFruitTree.Phenology.Age.Years",StartAgeValue);
                YKLModifiers = new double[Soil.Thickness.Length];
                XDepth = new double[Soil.Thickness.Length];
                Depth = 0;
                for (int layer = 0; layer < Soil.Thickness.Length; layer++)
                {
                    Depth += Soil.Thickness[layer] / 2;  //Add half of the thickness of the current layer so depth is the mid depth of that layer
                    if (Depth <= KLReductionDepth)
                    {
                        YKLModifiers[layer] = SurfaceKL;
                        XDepth[layer] = Depth;
                    }
                    else
                    {
                        double KLMod = SurfaceKL * Math.Exp(-KLReductionFactor * (Depth - KLReductionDepth));
                        YKLModifiers[layer] = KLMod;
                        XDepth[layer] = Depth;
                    }
                    Depth += Soil.Thickness[layer] / 2;  //Add the other half of the current layer so depth is the top of the next layer
                }
                object KLMods = YKLModifiers;
                zone.Set("SimpleFruitTree.Root.KLModifier.XYPairs.Y", KLMods);
                object Depths = XDepth;
                zone.Set("SimpleFruitTree.Root.KLModifier.XYPairs.X", Depths);
            }
        }
    }
}
```
      Manager SetupTreeRootZones
        UseExtraZone = True
```csharp
using System;
using Models.Core;
using System.Collections.Generic;
using System.Text;
using Models.PMF;
using Models;
using System.Xml.Serialization;
using APSIM.Shared.Utilities;

namespace Models
{
    [Serializable] 
    public class Script : Model
    {
        [Link] Plant SimpleFruitTree;
        [Link] Clock Clock;
        [Link] Zone zone;

        [Description("Use extra root zone")]
        public bool UseExtraZone { get; set; }

        
        [EventSubscribe("Commencing")]
        private void OnSimulationCommencing(object sender, EventArgs e)
        {
            if (UseExtraZone)
            {
            SimpleFruitTree.Root.ZoneNamesToGrowRootsIn.Add("Alley");
            SimpleFruitTree.Root.ZoneRootDepths.Add(2600);
            SimpleFruitTree.Root.ZoneInitialDM.Add(10);
            }
        }
    }
}
```
      Manager PlantVariables
```csharp
using System;
using Models.Core;

namespace Models
{
    [Serializable]
    public class Script : Model
    {
        
    }
}
```
      Manager Automatic irrigation based on water deficit
        FASW = 0
        WaterDeficit = 0
        StartDate = 1-nov
        EndDate = 1-mar
        FASWThreshold = 0.6
        FASWDepth = 600
        Amount = 20
```csharp
using System;
using Models.Core;
using System.Collections.Generic;
using System.Text;
using Models.Soils;
using Models.PMF;
using Models;
using System.Xml.Serialization;
using APSIM.Shared.Utilities;

namespace Models
{
    [Serializable] 
    public class Script : Model
    {
        public double FASW { get; set; }
        public double WaterDeficit  { get; set; }
    
        [Link] Zone zone;
        [Link] Irrigation irrigation;
        [Link] Soil soil;
        [Link] Clock clock;
        
        [Description("Start of sowing window (d-mmm)")]
        public string StartDate { get; set; }
        [Description("End of sowing window (d-mmm)")]
        public string EndDate { get; set; }

        [Description("Threshold fraction available water (0-1)")]
        public double FASWThreshold { get; set; }

        [Description("Soil depth (mm) to which fraction available water is calculated")]
        public double FASWDepth { get; set; }

        [Description("Amount of water (mm) applied each irrigation")]
        public double Amount { get; set; }

        [EventSubscribe("DoManagement")]
        private void OnDoManagement(object sender, EventArgs e)
        {
            CalculateFASW();
            if (DateUtilities.WithinDates(StartDate, clock.Today, EndDate))
            {
                if (FASW < FASWThreshold)
                {
                    irrigation.Apply(Amount, depth: 0);
                }
            }
        }
        
        private void CalculateFASW()
        {
            double[] LL15 = MathUtilities.Multiply(soil.LL15, soil.Thickness);
            double[] DUL = MathUtilities.Multiply(soil.DUL, soil.Thickness);
        
            int nlayr = GetLayerIndex();
            double cumdep = MathUtilities.Sum(soil.Thickness, 0, nlayr, 0.0);

            double excess_fr = MathUtilities.Divide((cumdep - FASWDepth), soil.Thickness[nlayr], 0.0);

            // note that results may be strange if swdep < ll15
            double avail_sw = (MathUtilities.Sum(soil.Water, 0, nlayr, 0.0)
                              - excess_fr * soil.Water[nlayr])
                              - (MathUtilities.Sum(LL15, 0, nlayr, 0.0)
                              - excess_fr * LL15[nlayr]);


            double pot_avail_sw = (MathUtilities.Sum(DUL, 0, nlayr, 0.0)
                                  - excess_fr * DUL[nlayr])
                                  - (MathUtilities.Sum(LL15, 0, nlayr, 0.0)
                                  - excess_fr * LL15[nlayr]);

            FASW = MathUtilities.Divide(avail_sw, pot_avail_sw, 0.0);
            WaterDeficit = MathUtilities.Constrain(pot_avail_sw - avail_sw, 0.0, 100000);
        }

        private int GetLayerIndex()
        {
            double[] cumThickness = Soil.ToCumThickness(soil.Thickness);
            for (int i = 1; i < cumThickness.Length; i++)
            {
                if (FASWDepth < cumThickness[i])
                    return i - 1;
            }
            
            return cumThickness.Length - 1;
        }

    }
}
```
      Manager HarvestNPrune
        HarvestDate = 15-Feb
        PruneDate = 1-Jun
```csharp
using System;
using Models.Core;
using Models.PMF;
using Models.Soils;
using Models.Utilities;
using APSIM.Shared.Utilities;

namespace Models
{
    [Serializable]
    public class Script : Model
    {
        [Link] Clock Clock;
        [Link] Plant SimpleFruitTree;
        [Link] Summary Summary;
        [Link] Zone zone;

        [Description("Harvest date (d-mmm)")]
        public string HarvestDate { get; set; }
        [Description("Pruning date (d-mmm)")]
        public string PruneDate { get; set; }

        [EventSubscribe("DoManagement")]
        private void OnDoManagement(object sender, EventArgs e)
        {
            if (DateUtilities.WithinDates(HarvestDate, Clock.Today, HarvestDate))
            {
                SimpleFruitTree.RemoveBiomass("Harvest");
                object NotHarvested = 0;
                zone.Set("SimpleFruitTree.Fruit.DMDemands.Structural.PartitionFraction.FruitGrowth.Fraction.NotHarvested.FixedValue", NotHarvested);
            }

        	if (DateUtilities.WithinDates(PruneDate, Clock.Today, PruneDate))
            {
                SimpleFruitTree.RemoveBiomass("Prune");
                object NotHarvested = 1;
                zone.Set("SimpleFruitTree.Fruit.DMDemands.Structural.PartitionFraction.FruitGrowth.Fraction.NotHarvested.FixedValue", NotHarvested);
            }
        }
        
    }
}
```
    RectangularZone Alley: Length=100; Width=4; Slope=0
      Report: EventNames=[Clock].DoReport
      Report Drainage: EventNames=[Clock].DoReport
        VariableNames:
          [Clock].Today
          sum of [Soil].SoilWater.Flux[6] from 2009-01-21 to 2011-04-14 as drainage
      Soil: Latitude=0; Longitude=0
        LayerStructure: Thickness=[200, 200, 200, 200, 200, 200, 400, 400, 400, 600]
        Analysis: same as Peach.Row.Soil.Analysis
        InitialWater Initial water: PercentMethod=1; FractionFull=1
        Water
          Thickness  BD  AirDry  LL15  DUL   SAT
          400        1   0.009   0.18  0.38  0.5
          400        1   0.18    0.18  0.36  0.48
          400        1   0.18    0.2   0.42  0.54
          1800       1   0.2     0.2   0.42  0.54
          SoilCrop SimpleFruitTreeSoil: LL=[0.18, 0.18, 0.2, 0.2]; KL=[0.1, 0.05, 0.03, 0.01]; XF=[1, 1, 1, 1]
          SoilCrop SlurpSoil: LL=[0.18, 0.18, 0.2, 0.2]; KL=[0.11, 0.11, 0.11, 0.11]; XF=[1, 1, 1, 1]
        SoilWater: same as Peach.Row.Soil.SoilWater
        SoilNitrogen: same as Peach.Row.Soil.SoilNitrogen
        SoilOrganicMatter: same as Peach.Row.Soil.SoilOrganicMatter
        Sample Initial nitrogen: NO3Units=kg/ha; NH4Units=ppm; SWUnits=Volumetric; OCUnits=Total; PHUnits=Water
          Thickness  NO3  NH4
          100        217  0
          200        30   0
          300        5    0
          300        5    0
          300        0    0
          300        0    0
        CERESSoilTemperature
        OutputLayers: Thickness=[400, 400, 400]
      SurfaceOrganicMatter: InitialResidueName=wheat_stubble; InitialResidueType=wheat; InitialResidueMass=500; InitialStandingFraction=0; InitialCPR=0; InitialCNR=100; FractionFaecesAdded=0.5
      Plant Slurp: CropType=Slurp; IsEnding=false; DaysAfterEnding=0
      Fertiliser
      Irrigation
      Manager PastureInitialisation
        CultivarName = StaticCrop
        InitialRootDepth = 2000
        SowingDate = 2007-07-01
        RootDepth = 2000
        RFV = 10
        KLReductionFactor = -0.001
        KLReductionDepth = 150
        YKLModifiers =
        XDepth =
        MaxG = 0.004
        R50 = 150
```csharp
using System;
using Models.Core;
using Models.PMF;
using APSIM.Shared.Utilities;
using Models.Soils;
        
namespace Models
{
    [Serializable] 
    [System.Xml.Serialization.XmlInclude(typeof(Model))]
    public class Script : Model
    {
        [Link] Plant Slurp;
        [Link] Clock Clock;
        [Link] Soil Soil;
        [Link] Zone zone;

        [Display(Type = DisplayType.CultivarName)]
        [Description("Plant Type")]
        public string CultivarName { get; set; }
        [Description("Initial Root Depth")]
        public double InitialRootDepth { get; set; }
        [Description("Initialisation Date")]
        public DateTime SowingDate { get; set; }
        [Description("Maximum Root Depth")]
        public double RootDepth { get; set; }
        [Description("Roof Front Velocity")]
        public double RFV { get; set; }
        [Description("Factor to change Kl modifier with Depth")]
        public double KLReductionFactor { get; set; }
        [Description("Depth that KL starts to decline")]
        public double KLReductionDepth { get; set; }
        
        public double[] YKLModifiers { get; set; }
        public double[] XDepth { get; set; }
        private double Depth { get; set; }
        
        [Description("Maximum Stomatal Conductance")]
        public double MaxG { get; set; }
        [Description("Stomatal Radn response")]
        public double R50 { get; set; }
        
        [EventSubscribe("DoManagement")]
        private void OnDoManagement(object sender, EventArgs e)
        {
            if (Clock.Today.Date == SowingDate)
            {
                Slurp.Sow(cultivar: CultivarName, population: 1, depth: InitialRootDepth, rowSpacing: 150);
                
                YKLModifiers = new double[Soil.Thickness.Length];
                XDepth = new double[Soil.Thickness.Length];
                Depth = 0;
                for (int layer = 0; layer < Soil.Thickness.Length; layer++)
                {
                    Depth += Soil.Thickness[layer] / 2;  //Add half of the thickness of the current layer so depth is the mid depth of that layer
                    if (Depth <= KLReductionDepth)
                    {
                        YKLModifiers[layer] = 1;
                        XDepth[layer] = Depth;
                    }
                    else
                    {
                        double KLMod = 1 * Math.Exp(-KLReductionFactor * (Depth - KLReductionDepth));
                        YKLModifiers[layer] = KLMod;
                        XDepth[layer] = Depth;
                    }
                    Depth += Soil.Thickness[layer] / 2;  //Add the other half of the current layer so depth is the top of the next layer
                }
                object KLMods = YKLModifiers;
                zone.Set("Slurp.Root.KLModifier.XYPairs.Y", KLMods);
                object Depths = XDepth;
                zone.Set("Slurp.Root.KLModifier.XYPairs.X", Depths);
                object RD = RootDepth;
                zone.Set("Slurp.Root.MaximumRootDepth.FixedValue", RD);
                object RV = RFV;
                zone.Set("Slurp.Root.RootFrontVelocity.Potential.FixedValue", RV);
                object GMaxValue = MaxG;
                zone.Set("Slurp.Leaf.Gsmax350", GMaxValue); 
                object R50Value = R50; 
                zone.Set("Slurp.Leaf.R50", R50Value); 
                
            }
        }
    }
}
```
      Manager SetPastureVariables
        Ext_coef = 0.6
        MaximumHeight = 200
        MinimumHeight = 50
        Cover = 0
        LAI = 0
```csharp
using System;
using Models.Core;
using System.Collections.Generic;
using System.Text;
using Models.PMF;
using Models;
using System.Xml.Serialization;
using APSIM.Shared.Utilities;
using System.Data;

namespace Models
{
    [Serializable] 
    //[System.Xml.Serialization.XmlInclude(typeof(Model))]
    public class Script : Model
    {
        [Link] Plant Slurp;
        [Link] Clock Clock;
        [Link] Zone zone;
        [Link] Weather weather;

        
        [Description("Extinction coefficient")]
        public  double Ext_coef { get; set; }
        [Description("Maximum height of leaves")]
        public double MaximumHeight { get; set; }
        [Description("Minimum height of leaves")]
        public double MinimumHeight { get; set; }
        
        public double Cover {get; private set;}
        public double LAI { get; private set; }
                
        [EventSubscribe("StartOfSimulation")]
        private void OnStartOfSimulation(object sender, EventArgs e)
        {
        	Cover = 0.5;
        }
        
        [EventSubscribe("StartOfDay")]
        private void OnStartOfDay(object sender, EventArgs e)
        {
            Cover += weather.MeanT * 0.0005;

            if (Cover >= 1.0)
            {
            	Cover = 0.75;        
            }

          	LAI = Math.Log(1 - Cover) / -Ext_coef;

            object LAIResetValue = LAI;
            zone.Set("Slurp.Leaf.LAIFunction.FixedValue", LAIResetValue);  
            object HeightResetValue = MinimumHeight + Cover * (MaximumHeight-MinimumHeight);
            zone.Set("Slurp.Leaf.HeightFunction.FixedValue", HeightResetValue);  
        }
    }
}
```
      Manager SetupPastureRootZones
        UseExtraZone = False
```csharp
using System;
using Models.Core;
using System.Collections.Generic;
using System.Text;
using Models.PMF;
using Models;
using System.Xml.Serialization;
using APSIM.Shared.Utilities;

namespace Models
{
    [Serializable] 
    public class Script : Model
    {
        [Link] Plant Slurp;
        [Link] Clock Clock;
        [Link] Zone zone;

        [Description("Use extra root zone")]
        public bool UseExtraZone { get; set; }

        
        [EventSubscribe("Commencing")]
        private void OnSimulationCommencing(object sender, EventArgs e)
        {
            if (UseExtraZone)
            {
            Slurp.Root.ZoneNamesToGrowRootsIn.Add("Row");
            Slurp.Root.ZoneRootDepths.Add(600);
            Slurp.Root.ZoneInitialDM.Add(10);
            }
        }
    }
}
```
      Manager PlantVariables
        script: same as in Peach.Row.PlantVariables
  Simulation Kiwifruit
    Clock: StartDate=2008-07-01; EndDate=2011-06-01
    Summary SummaryFile
    Weather: FileName=Omarunui.met
    MicroClimate: a_interception=0; b_interception=1; c_interception=0; d_interception=0; soil_albedo=0.3; SoilHeatFluxFraction=0.4; NightInterceptionFraction=0.5; ReferenceHeight=2
    SoilArbitrator Soil Arbitrator
    RectangularZone Row: Length=100; Width=1; Slope=0
      Report: EventNames=[Clock].DoReport
      Report Drainage: EventNames=[Clock].DoReport
        VariableNames:
          [Clock].Today
          sum of [Soil].SoilWater.Flux[6] from 2008-11-15 to 2011-04-14 as drainage
      Soil: Latitude=0; Longitude=0
        LayerStructure: Thickness=[200, 200, 200, 200, 200, 200, 300, 300, 400, 800]
        Analysis: same as Peach.Row.Soil.Analysis
        InitialWater Initial water: PercentMethod=1; FractionFull=0.7
        Water
          Thickness  BD  AirDry  LL15  DUL   SAT
          300        1   0.1     0.18  0.36  0.5
          300        1   0.18    0.18  0.28  0.35
          300        1   0.2     0.2   0.36  0.48
          300        1   0.22    0.22  0.39  0.55
          300        1   0.2     0.2   0.32  0.44
          1500       1   0.3     0.3   0.48  0.58
          SoilCrop SimpleFruitTreeSoil: LL=[0.18, 0.18, 0.2, 0.22, 0.2, 0.3]; KL=[1, 1, 1, 1, 1, 1]; XF=[1, 1, 1, 1, 1, 1]
          SoilCrop SlurpSoil: LL=[0.18, 0.18, 0.2, 0.22, 0.2, 0.3]; KL=[0.11, 0.11, 0.11, 0.11, 0.11, 0.11]; XF=[1, 1, 1, 1, 1, 1]
        SoilWater: SummerDate=1-Nov; SummerU=9; SummerCona=4.4; WinterDate=1-Apr; WinterU=9; WinterCona=4.4; DiffusConst=0; DiffusSlope=0; Salb=0.18; CN2Bare=68; CNRed=20; CNCov=0.8; slope=0; discharge_width=0; catchment_area=0; max_pond=0; ResidueInterception=0
          Thickness  SWCON  KLAT
          150        0.55   0
          150        0.55   0
          100        0.55   0
          200        0.55   0
          200        0.55   0
          200        0.55   0
          200        0.55   0
          200        0.55   0
          200        0.55   0
          200        0.55   0
          200        0.55   0
          200        0.55   0
          400        0.55   0
        SoilNitrogen: same as Peach.Row.Soil.SoilNitrogen
        SoilOrganicMatter: same as Peach.Row.Soil.SoilOrganicMatter
        Sample Initial nitrogen: NO3Units=kg/ha; NH4Units=ppm; SWUnits=Volumetric; OCUnits=Total; PHUnits=Water
          Thickness  NO3  NH4
          100        217  0
          200        30   0
          300        5    0
          300        5    0
          300        0    0
          300        0    0
        CERESSoilTemperature
        OutputLayers: Thickness=[300, 300, 300, 300, 300, 300]
      SurfaceOrganicMatter: InitialResidueName=wheat_stubble; InitialResidueType=wheat; InitialResidueMass=500; InitialStandingFraction=0; InitialCPR=0; InitialCNR=100; FractionFaecesAdded=0.5
      Plant SimpleFruitTree: CropType=Slurp; IsEnding=false; DaysAfterEnding=0
      Fertiliser
      Irrigation
      Manager SetupTreeRootZones: same as Peach.Row.SetupTreeRootZones
      Operations
        2008-10-14  [Irrigation].apply(15)
        2008-10-15  [Irrigation].apply(15)
        2008-10-16  [Irrigation].apply(15)
        2008-10-19  [Irrigation].apply(9)
        2008-10-31  [Irrigation].apply(12)
        2008-11-01  [Irrigation].apply(12)
        2008-11-03  [Irrigation].apply(12)
        2008-11-04  [Irrigation].apply(12)
        2008-11-05  [Irrigation].apply(12)
        2008-11-06  [Irrigation].apply(6)
        2008-11-07  [Irrigation].apply(6)
        2008-11-08  [Irrigation].apply(9)
        2008-11-12  [Irrigation].apply(6)
        2008-11-13  [Irrigation].apply(6)
        2008-11-15  [Irrigation].apply(9)
        2008-11-16  [Irrigation].apply(9)
        2008-11-17  [Irrigation].apply(9)
        2008-11-19  [Irrigation].apply(9)
        2008-11-20  [Irrigation].apply(9)
        2008-11-21  [Irrigation].apply(3)
        2008-11-23  [Irrigation].apply(6)
        2008-11-24  [Irrigation].apply(6)
        2008-11-25  [Irrigation].apply(6)
        2008-11-26  [Irrigation].apply(6)
        2008-11-27  [Irrigation].apply(9)
        2008-11-28  [Irrigation].apply(6)
        2008-11-30  [Irrigation].apply(6)
        2008-12-01  [Irrigation].apply(6)
        2008-12-02  [Irrigation].apply(6)
        2008-12-03  [Irrigation].apply(6)
        2008-12-04  [Irrigation].apply(6)
        2008-12-05  [Irrigation].apply(15)
        2008-12-06  [Irrigation].apply(6)
        2008-12-07  [Irrigation].apply(6)
        2008-12-08  [Irrigation].apply(6)
        2008-12-11  [Irrigation].apply(9)
        2008-12-12  [Irrigation].apply(9)
        2008-12-13  [Irrigation].apply(9)
        2008-12-14  [Irrigation].apply(9)
        2008-12-17  [Irrigation].apply(9)
        2008-12-18  [Irrigation].apply(9)
        2008-12-19  [Irrigation].apply(9)
        2008-12-20  [Irrigation].apply(9)
        2008-12-21  [Irrigation].apply(9)
        2008-12-29  [Irrigation].apply(6)
        2008-12-30  [Irrigation].apply(6)
        2008-12-31  [Irrigation].apply(6)
        2009-01-01  [Irrigation].apply(12)
        2009-01-02  [Irrigation].apply(12)
        2009-01-03  [Irrigation].apply(12)
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        2009-09-08  [Irrigation].apply(7.5)
        2010-05-09  [Irrigation].apply(50)
      Manager PlantVariables
        script: same as in Peach.Row.PlantVariables
      Manager TreeInitialisation
        CultivarName = Kiwifruit
        SowingDate = 2008-07-01
        StartAge = 6
        SurfaceKL = 0.2
        KLReductionFactor = 0.003
        KLReductionDepth = 150
        YKLModifiers =
        XDepth =
        script: same as in Peach.Row.TreeInitialisation
      Manager HarvestNPrune
        HarvestDate = 15-Apr
        PruneDate = 1-Jun
        script: same as in Peach.Row.HarvestNPrune
    RectangularZone Alley: Length=100; Width=3; Slope=0
      Report: EventNames=[Clock].DoReport
      Report Drainage: EventNames=[Clock].DoReport
        VariableNames:
          [Clock].Today
          sum of [Soil].SoilWater.Flux[7] from 2008-11-15 to 2011-04-14 as drainage
      Soil: Latitude=0; Longitude=0
        LayerStructure: Thickness=[200, 200, 200, 200, 200, 200, 300, 300, 400, 800]
        Analysis: same as Peach.Row.Soil.Analysis
        InitialWater Initial water: PercentMethod=1; FractionFull=0.7
        Water
          Thickness  BD  AirDry  LL15  DUL   SAT
          300        1   0.1     0.1   0.28  0.36
          300        1   0.18    0.18  0.28  0.35
          300        1   0.18    0.18  0.34  0.46
          300        1   0.26    0.26  0.46  0.55
          300        1   0.18    0.18  0.31  0.42
          1500       1   0.24    0.24  0.4   0.48
          SoilCrop SimpleFruitTreeSoil: LL=[0.1, 0.18, 0.18, 0.26, 0.18, 0.24]; KL=[1, 1, 1, 1, 1, 1]; XF=[1, 1, 1, 1, 1, 0.1]
          SoilCrop SlurpSoil: LL=[0.1, 0.18, 0.18, 0.26, 0.18, 0.24]; KL=[0.11, 0.11, 0.11, 0.11, 0.11, 0.11]; XF=[1, 1, 1, 1, 1, 1]
        SoilWater: SummerDate=1-Nov; SummerU=9; SummerCona=4.4; WinterDate=1-Apr; WinterU=9; WinterCona=4.4; DiffusConst=0; DiffusSlope=0; Salb=0.18; CN2Bare=68; CNRed=20; CNCov=0.8; slope=0; discharge_width=0; catchment_area=0; max_pond=0; ResidueInterception=0
          Thickness  SWCON  KLAT
          300        0.55   0
          300        0.55   0
          300        0.2    0
          300        0.55   0
          300        0.1    0
          300        0.55   0
          1200       0.55   0
        SoilNitrogen: same as Peach.Row.Soil.SoilNitrogen
        SoilOrganicMatter: same as Peach.Row.Soil.SoilOrganicMatter
        Sample Initial nitrogen: NO3Units=kg/ha; NH4Units=ppm; SWUnits=Volumetric; OCUnits=Total; PHUnits=Water
          Thickness  NO3  NH4
          100        217  0
          200        30   0
          300        5    0
          300        5    0
          300        0    0
          300        0    0
        CERESSoilTemperature
        OutputLayers: Thickness=[300, 300, 300, 300, 300, 300]
      SurfaceOrganicMatter: InitialResidueName=wheat_stubble; InitialResidueType=wheat; InitialResidueMass=500; InitialStandingFraction=0; InitialCPR=0; InitialCNR=100; FractionFaecesAdded=0.5
      Plant Slurp: CropType=Slurp; IsEnding=false; DaysAfterEnding=0
      Fertiliser
      Irrigation
      Manager PastureInitialisation
        CultivarName = StaticCrop
        InitialRootDepth = 2000
        SowingDate = 2008-07-01
        RootDepth = 2000
        RFV = 10
        KLReductionFactor = -0.001
        KLReductionDepth = 150
        YKLModifiers =
        XDepth =
        MaxG = 0.004
        R50 = 150
        script: same as in Peach.Alley.PastureInitialisation
      Manager SetPastureVariables
        Ext_coef = 0.6
        MaximumHeight = 200
        MinimumHeight = 50
        Cover = 0
        LAI = 0
```csharp
using System;
using Models.Core;
using System.Collections.Generic;
using System.Text;
using Models.PMF;
using Models;
using System.Xml.Serialization;
using APSIM.Shared.Utilities;
using System.Data;

namespace Models
{
    [Serializable] 
    //[System.Xml.Serialization.XmlInclude(typeof(Model))]
    public class Script : Model
    {
        [Link] Plant Slurp;
        [Link] Clock Clock;
        [Link] Zone zone;
        [Link] Weather weather;

        
        [Description("Extinction coefficient")]
        public  double Ext_coef { get; set; }
        [Description("Maximum height of leaves")]
        public double MaximumHeight { get; set; }
        [Description("Minimum height of leaves")]
        public double MinimumHeight { get; set; }
        
        public double Cover {get; private set;}
        public double LAI { get; private set; }
                
        [EventSubscribe("StartOfSimulation")]
        private void OnStartOfSimulation(object sender, EventArgs e)
        {
        	Cover = 0.5;
        }
        
        [EventSubscribe("StartOfDay")]
        private void OnStartOfDay(object sender, EventArgs e)
        {
            Cover += weather.MeanT * 0.0005;

            if (Cover >= 0.9)
            {
            	Cover = 0.65;        
            }

          	LAI = Math.Log(1 - Cover) / -Ext_coef;

            object LAIResetValue = LAI;
            zone.Set("Slurp.Leaf.LAIFunction.FixedValue", LAIResetValue);  
            object HeightResetValue = MinimumHeight + Cover * (MaximumHeight-MinimumHeight);
            zone.Set("Slurp.Leaf.HeightFunction.FixedValue", HeightResetValue);  
        }
    }
}
```
      Manager SetupPastureRootZones
        UseExtraZone = False
```csharp
using System;
using Models.Core;
using System.Collections.Generic;
using System.Text;
using Models.PMF;
using Models;
using System.Xml.Serialization;
using APSIM.Shared.Utilities;

namespace Models
{
    [Serializable] 
    public class Script : Model
    {
        [Link] Plant Slurp;
        [Link] Clock Clock;
        [Link] Zone zone;

        [Description("Use extra root zone")]
        public bool UseExtraZone { get; set; }

        
        [EventSubscribe("Commencing")]
        private void OnSimulationCommencing(object sender, EventArgs e)
        {
            if (UseExtraZone)
            {
            Slurp.Root.ZoneNamesToGrowRootsIn.Add("Row_irrigated");
            Slurp.Root.ZoneRootDepths.Add(600);
            Slurp.Root.ZoneInitialDM.Add(10);
            }
        }
    }
}
```
      Manager PlantVariables
        script: same as in Peach.Row.PlantVariables
      Operations: same as Kiwifruit.Row.Operations
  Simulation Apple_Dwarf
    Clock: StartDate=2008-07-01; EndDate=2011-07-01
    Summary SummaryFile
    Weather: FileName=Whakatu.met
    MicroClimate: a_interception=0; b_interception=1; c_interception=0; d_interception=0; soil_albedo=0.3; SoilHeatFluxFraction=0.4; NightInterceptionFraction=0.5; ReferenceHeight=2
    SoilArbitrator Soil Arbitrator
    RectangularZone Row: Length=100; Width=1.3; Slope=0
      Report: EventNames=[Clock].DoReport
      Report Drainage: EventNames=[Clock].DoReport
        VariableNames:
          [Clock].Today
          sum of [Soil].SoilWater.Flux[6] from 2008-10-01 to 2011-03-08 as drainage
          [Soil].SoilWater.SWmm[9] + [Soil].SoilWater.SWmm[10] as SW_belowRoots
      Soil: Latitude=0; Longitude=0
        LayerStructure: Thickness=[200, 200, 200, 200, 200, 200, 300, 300, 400, 800]
        Analysis: same as Peach.Row.Soil.Analysis
        InitialWater Initial water: PercentMethod=1; FractionFull=1
        Water
          Thickness  BD  AirDry  LL15  DUL   SAT   KS
          300        1   0.2     0.2   0.4   0.5   100
          300        1   0.2     0.2   0.39  0.5   100
          300        1   0.2     0.2   0.43  0.5   50
          300        1   0.2     0.2   0.46  0.5   40
          300        1   0.2     0.2   0.45  0.5   10
          300        1   0.2     0.2   0.43  0.53  1
          1200       1   0.2     0.2   0.43  0.53  0
          SoilCrop SimpleFruitTreeSoil: LL=[0.2, 0.2, 0.2, 0.2, 0.2, 0.2, 0.2]; KL=[1, 1, 1, 1, 1, 1, 1]; XF=[1, 1, 1, 1, 1, 1, 1]
          SoilCrop SlurpSoil: LL=[0.2, 0.2, 0.2, 0.2, 0.2, 0.2, 0.2]; KL=[0.11, 0.11, 0.11, 0.11, 0.11, 0.11, 0.11]; XF=[1, 1, 1, 1, 1, 1, 1]
        SoilWater: SummerDate=1-Nov; SummerU=9; SummerCona=4.4; WinterDate=1-Apr; WinterU=9; WinterCona=4.4; DiffusConst=88; DiffusSlope=35.4; Salb=0.18; CN2Bare=68; CNRed=20; CNCov=0.8; slope=0; discharge_width=0; catchment_area=0; max_pond=0; ResidueInterception=0
          Thickness  SWCON  KLAT
          300        0.55   0
          300        0.55   0
          300        0.55   0
          300        0.55   0
          300        0.1    0
          300        0.02   0
          400        0.02   0
          800        0      0
        SoilNitrogen: same as Peach.Row.Soil.SoilNitrogen
        SoilOrganicMatter: same as Peach.Row.Soil.SoilOrganicMatter
        Sample Initial nitrogen: NO3Units=kg/ha; NH4Units=ppm; SWUnits=Volumetric; OCUnits=Total; PHUnits=Water
          Thickness  NO3  NH4
          100        217  0
          200        30   0
          300        5    0
          300        5    0
          300        0    0
          300        0    0
        CERESSoilTemperature
        OutputLayers: Thickness=[300, 300, 300, 300, 300, 300]
      SurfaceOrganicMatter: InitialResidueName=wheat_stubble; InitialResidueType=wheat; InitialResidueMass=500; InitialStandingFraction=0; InitialCPR=0; InitialCNR=100; FractionFaecesAdded=0.5
      Plant SimpleFruitTree: CropType=Slurp; IsEnding=false; DaysAfterEnding=0
      Fertiliser
      Irrigation
      Manager TreeInitialisation
        CultivarName = Apple
        SowingDate = 2008-07-01
        StartAge = 6
        SurfaceKL = 0.16
        KLReductionFactor = 0.003
        KLReductionDepth = 150
        YKLModifiers =
        XDepth =
        script: same as in Peach.Row.TreeInitialisation
      Manager SetupTreeRootZones: same as Peach.Row.SetupTreeRootZones
      Operations
        2008-09-16  [Irrigation].apply(15)
        2008-10-05  [Irrigation].apply(5)
        2008-10-06  [Irrigation].apply(6)
        2008-10-11  [Irrigation].apply(15)
        2008-10-18  [Irrigation].apply(16)
        2008-10-22  [Irrigation].apply(2)
        2008-10-25  [Irrigation].apply(12)
        2008-11-01  [Irrigation].apply(6)
        2008-11-04  [Irrigation].apply(20)
        2008-11-14  [Irrigation].apply(15)
        2008-11-19  [Irrigation].apply(15)
        2008-11-23  [Irrigation].apply(15)
        2008-11-27  [Irrigation].apply(15)
        2008-12-01  [Irrigation].apply(2)
        2008-12-03  [Irrigation].apply(15)
        2008-12-06  [Irrigation].apply(15)
        2008-12-13  [Irrigation].apply(9)
        2008-12-16  [Irrigation].apply(15)
        2008-12-24  [Irrigation].apply(16)
        2008-12-31  [Irrigation].apply(8)
        2009-01-04  [Irrigation].apply(15)
        2009-01-11  [Irrigation].apply(15)
        2009-01-18  [Irrigation].apply(15)
        2009-01-24  [Irrigation].apply(15)
        2009-01-30  [Irrigation].apply(15)
        2009-02-04  [Irrigation].apply(15)
        2009-02-12  [Irrigation].apply(18)
        2009-02-16  [Irrigation].apply(12)
        2009-02-20  [Irrigation].apply(7)
        2009-03-01  [Irrigation].apply(50)
        2009-03-22  [Irrigation].apply(25)
        2009-12-16  [Irrigation].apply(20)
        2009-12-21  [Irrigation].apply(20)
        2009-12-26  [Irrigation].apply(20)
        2010-01-03  [Irrigation].apply(20)
        2010-01-08  [Irrigation].apply(15)
        2010-03-17  [Irrigation].apply(20)
        2010-03-18  [Irrigation].apply(20)
        2010-03-19  [Irrigation].apply(20)
        2010-03-12  [Irrigation].apply(20)
        2010-10-28  [Irrigation].apply(15)
        2010-10-29  [Irrigation].apply(15)
        2010-11-30  [Irrigation].apply(15)
        2010-12-06  [Irrigation].apply(15)
        2010-12-07  [Irrigation].apply(15)
        2010-12-27  [Irrigation].apply(15)
        2011-01-02  [Irrigation].apply(15)
        2011-01-04  [Irrigation].apply(15)
        2011-01-29  [Irrigation].apply(15)
        2011-02-16  [Irrigation].apply(15)
      Manager PlantVariables
        script: same as in Peach.Row.PlantVariables
      Manager WaterTable
        StartDate = 1-dec
        EndDate = 1-mar
```csharp
using System;
using Models.Core;
using Models.PMF;
using System.Collections.Generic;
using Models.Soils;
using APSIM.Shared.Utilities;
using Models.Zones;

namespace Models
{
    [Serializable]
    public class Script : Model
    {
        [Link] Clock Clock;
        [Link] Soil soil;
        [Link] Irrigation irrigation;
        [Description("Start of sowing window (d-mmm)")]
        public string StartDate { get; set; }
        [Description("End of sowing window (d-mmm)")]
        public string EndDate { get; set; }

        [EventSubscribe("StartOfDay")]
        private void OnStartOfDay(object sender, EventArgs e)
        {
        if (DateUtilities.WithinDates(StartDate, Clock.Today, EndDate))
            irrigation.Apply(2, 2500);
        }
    }
}
```
      Manager HarvestNPrune: same as Kiwifruit.Row.HarvestNPrune
    RectangularZone Alley: Length=100; Width=2.2; Slope=0
      Report: EventNames=[Clock].DoReport
      Report Drainage: EventNames=[Clock].DoReport
        VariableNames:
          [Clock].Today
          sum of [Soil].SoilWater.Flux[6] from 2008-10-01 to 2011-03-08 as drainage
          [Soil].SoilWater.SWmm[9] + [Soil].SoilWater.SWmm[10] as SW_belowRoots
      Soil: same as Apple_Dwarf.Row.Soil
      SurfaceOrganicMatter: InitialResidueName=wheat_stubble; InitialResidueType=wheat; InitialResidueMass=500; InitialStandingFraction=0; InitialCPR=0; InitialCNR=100; FractionFaecesAdded=0.5
      Plant Slurp: CropType=Slurp; IsEnding=false; DaysAfterEnding=0
      Fertiliser
      Irrigation
      Manager PastureInitialisation: same as Kiwifruit.Alley.PastureInitialisation
      Manager SetPastureVariables: same as Peach.Alley.SetPastureVariables
      Manager SetupPastureRootZones: same as Peach.Alley.SetupPastureRootZones
      Manager PlantVariables
        script: same as in Peach.Row.PlantVariables
      Operations: same as Apple_Dwarf.Row.Operations
      Manager WaterTable: same as Apple_Dwarf.Row.WaterTable
  Simulation Apple_Tall
    Clock: StartDate=2009-07-01; EndDate=2011-07-01
    Summary SummaryFile
    Weather: FileName=Whakatu.met
    MicroClimate: a_interception=0; b_interception=1; c_interception=0; d_interception=0; soil_albedo=0.3; SoilHeatFluxFraction=0.4; NightInterceptionFraction=0.5; ReferenceHeight=2
    SoilArbitrator Soil Arbitrator
    RectangularZone Row: Length=100; Width=1.3; Slope=0
      Report: EventNames=[Clock].DoReport
      Report Drainage: EventNames=[Clock].DoReport
        VariableNames:
          [Clock].Today
          sum of [Soil].SoilWater.Flux[7] from 2008-10-01 to 2010-07-23 as drainage
      Soil: Latitude=0; Longitude=0
        LayerStructure: Thickness=[200, 200, 200, 200, 200, 200, 400, 400, 400, 600]
        Analysis: same as Peach.Row.Soil.Analysis
        InitialWater Initial water: PercentMethod=1; FractionFull=1
        Water
          Thickness  BD   AirDry  LL15  DUL   SAT
          400        1    0.09    0.18  0.34  0.46
          400        1    0.24    0.24  0.44  0.55
          400        0.8  0.3     0.3   0.52  0.6
          1800       0.8  0.3     0.3   0.52  0.6
          SoilCrop SimpleFruitTreeSoil: LL=[0.18, 0.24, 0.3, 0.3]; KL=[1, 1, 1, 1]; XF=[1, 1, 1, 1]
          SoilCrop SlurpSoil: LL=[0.18, 0.24, 0.3, 0.3]; KL=[0.11, 0.11, 0.11, 0.11]; XF=[1, 1, 1, 1]
        SoilWater: same as Peach.Row.Soil.SoilWater
        SoilNitrogen: same as Peach.Row.Soil.SoilNitrogen
        SoilOrganicMatter: same as Peach.Row.Soil.SoilOrganicMatter
        Sample Initial nitrogen: NO3Units=kg/ha; NH4Units=ppm; SWUnits=Volumetric; OCUnits=Total; PHUnits=Water
          Thickness  NO3  NH4
          100        217  0
          200        30   0
          300        5    0
          300        5    0
          300        0    0
          300        0    0
        CERESSoilTemperature
        OutputLayers: Thickness=[400, 400, 400, 400]
      SurfaceOrganicMatter: InitialResidueName=wheat_stubble; InitialResidueType=wheat; InitialResidueMass=500; InitialStandingFraction=0; InitialCPR=0; InitialCNR=100; FractionFaecesAdded=0.5
      Plant SimpleFruitTree: CropType=Slurp; IsEnding=false; DaysAfterEnding=0
      Fertiliser
      Irrigation
      Manager TreeInitialisation
        CultivarName = Apple
        SowingDate = 2009-07-01
        StartAge = 6
        SurfaceKL = 0.16
        KLReductionFactor = 0.003
        KLReductionDepth = 150
        YKLModifiers =
        XDepth =
        script: same as in Peach.Row.TreeInitialisation
      Manager SetupTreeRootZones: same as Peach.Row.SetupTreeRootZones
      Operations
        2008-09-13  [Irrigation].apply(15)
        2008-10-05  [Irrigation].apply(5)
        2008-10-06  [Irrigation].apply(6)
        2008-11-10  [Irrigation].apply(15)
        2008-10-18  [Irrigation].apply(16)
        2008-10-22  [Irrigation].apply(2)
        2008-10-25  [Irrigation].apply(12)
        2008-11-01  [Irrigation].apply(6)
        2008-11-10  [Irrigation].apply(15)
        2008-11-14  [Irrigation].apply(15)
        2008-11-20  [Irrigation].apply(15)
        2008-11-26  [Irrigation].apply(12)
        2008-12-01  [Irrigation].apply(2)
        2008-12-02  [Irrigation].apply(15)
        2008-12-08  [Irrigation].apply(15)
        2008-12-13  [Irrigation].apply(9)
        2009-12-18  [Irrigation].apply(20)
        2008-12-24  [Irrigation].apply(16)
        2008-12-31  [Irrigation].apply(8)
        2009-01-03  [Irrigation].apply(15)
        2009-01-11  [Irrigation].apply(15)
        2009-01-23  [Irrigation].apply(15)
        2009-02-12  [Irrigation].apply(18)
        2009-02-16  [Irrigation].apply(12)
        2009-02-20  [Irrigation].apply(7)
        2009-03-01  [Irrigation].apply(50)
        2009-03-22  [Irrigation].apply(25)
        2009-12-16  [Irrigation].apply(15)
        2009-12-21  [Irrigation].apply(18)
        2009-12-26  [Irrigation].apply(18)
        2010-01-03  [Irrigation].apply(20)
        2010-01-08  [Irrigation].apply(20)
        2010-03-28  [Irrigation].apply(30)
        2010-10-27  [Irrigation].apply(15)
        2010-11-25  [Irrigation].apply(15)
        2010-12-06  [Irrigation].apply(20)
        2010-12-12  [Irrigation].apply(15)
        2010-12-26  [Irrigation].apply(20)
        2011-01-01  [Irrigation].apply(20)
        2011-01-17  [Irrigation].apply(20)
        2011-02-07  [Irrigation].apply(20)
        2011-02-16  [Irrigation].apply(20)
        2011-03-16  [Irrigation].apply(20)
      Manager PlantVariables
        script: same as in Peach.Row.PlantVariables
      Manager WaterTable: same as Apple_Dwarf.Row.WaterTable
      Manager HarvestNPrune: same as Kiwifruit.Row.HarvestNPrune
    RectangularZone Alley: Length=100; Width=2.2; Slope=0
      Report: EventNames=[Clock].DoReport
      Report Drainage: EventNames=[Clock].DoReport
        VariableNames:
          [Clock].Today
          sum of [Soil].SoilWater.Flux[7] from 2008-10-01 to 2010-07-23 as drainage
      Soil: same as Apple_Tall.Row.Soil
      SurfaceOrganicMatter: InitialResidueName=wheat_stubble; InitialResidueType=wheat; InitialResidueMass=500; InitialStandingFraction=0; InitialCPR=0; InitialCNR=100; FractionFaecesAdded=0.5
      Plant Slurp: CropType=Slurp; IsEnding=false; DaysAfterEnding=0
      Fertiliser
      Irrigation
      Manager PastureInitialisation
        CultivarName = StaticCrop
        InitialRootDepth = 2000
        SowingDate = 2009-07-01
        RootDepth = 2000
        RFV = 10
        KLReductionFactor = -0.001
        KLReductionDepth = 150
        YKLModifiers =
        XDepth =
        MaxG = 0.004
        R50 = 150
        script: same as in Peach.Alley.PastureInitialisation
      Manager SetPastureVariables: same as Peach.Alley.SetPastureVariables
      Manager SetupPastureRootZones: same as Peach.Alley.SetupPastureRootZones
      Manager PlantVariables
        script: same as in Peach.Row.PlantVariables
      Manager WaterTable: same as Apple_Dwarf.Row.WaterTable
    Report: EventNames=[Clock].DoReport
  Experiment Grape_Squire_1
    DisabledSimNames=[Grape_Squire_1Irri70, Grape_Squire_1Irri80, Grape_SquireIrri20, Grape_SquireIrri40, Grape_SquireIrri70, Grape_SquireIrri80]
    Factors
      Factor Irri: Specification=[VineIrrigation]
        Operations 100
          2002-02-14  [DripIrrigator].Script.applyDripIrri(10.6);
          2002-02-17  [DripIrrigator].Script.applyDripIrri(10.6);
          2002-02-19  [DripIrrigator].Script.applyDripIrri(10.6);
          2002-02-21  [DripIrrigator].Script.applyDripIrri(10.6);
          2002-02-25  [DripIrrigator].Script.applyDripIrri(10.6);
          2002-02-26  [DripIrrigator].Script.applyDripIrri(10.6);
          2002-03-03  [DripIrrigator].Script.applyDripIrri(10.6);
          2002-03-05  [DripIrrigator].Script.applyDripIrri(10.6);
          2002-03-07  [DripIrrigator].Script.applyDripIrri(10.6);
          2002-03-10  [DripIrrigator].Script.applyDripIrri(10.6);
          2002-03-12  [DripIrrigator].Script.applyDripIrri(10.6);
          2002-03-14  [DripIrrigator].Script.applyDripIrri(10.6);
          2002-03-19  [DripIrrigator].Script.applyDripIrri(10.6);
          2002-03-21  [DripIrrigator].Script.applyDripIrri(10.6);
          2002-03-24  [DripIrrigator].Script.applyDripIrri(10.6);
          2002-03-26  [DripIrrigator].Script.applyDripIrri(10.6);
          2002-04-01  [DripIrrigator].Script.applyDripIrri(10.6);
          2002-04-07  [DripIrrigator].Script.applyDripIrri(10.6);
          2002-04-10  [DripIrrigator].Script.applyDripIrri(10.6);
          2002-04-18  [DripIrrigator].Script.applyDripIrri(10.6);
          2002-04-21  [DripIrrigator].Script.applyDripIrri(10.6);
          2002-10-05  [DripIrrigator].Script.applyDripIrri(7.3);
          2002-10-08  [DripIrrigator].Script.applyDripIrri(7.3);
          2002-10-10  [DripIrrigator].Script.applyDripIrri(7.3);
          2002-10-12  [DripIrrigator].Script.applyDripIrri(7.3);
          2002-10-18  [DripIrrigator].Script.applyDripIrri(7.3);
          2002-10-23  [DripIrrigator].Script.applyDripIrri(7.3);
          2002-10-26  [DripIrrigator].Script.applyDripIrri(7.3);
          2002-10-28  [DripIrrigator].Script.applyDripIrri(7.3);
          2002-11-05  [DripIrrigator].Script.applyDripIrri(7.3);
          2002-11-08  [DripIrrigator].Script.applyDripIrri(7.3);
          2002-11-11  [DripIrrigator].Script.applyDripIrri(7.3);
          2002-11-18  [DripIrrigator].Script.applyDripIrri(7.3);
          2002-11-20  [DripIrrigator].Script.applyDripIrri(7.3);
          2002-11-23  [DripIrrigator].Script.applyDripIrri(7.3);
          2002-11-25  [DripIrrigator].Script.applyDripIrri(7.3);
          2002-11-29  [DripIrrigator].Script.applyDripIrri(7.3);
          2002-12-04  [DripIrrigator].Script.applyDripIrri(7.3);
          2002-12-09  [DripIrrigator].Script.applyDripIrri(7.3);
          2002-12-11  [DripIrrigator].Script.applyDripIrri(7.3);
          2002-12-19  [DripIrrigator].Script.applyDripIrri(7.3);
          2002-12-27  [DripIrrigator].Script.applyDripIrri(7.3);
          2002-12-31  [DripIrrigator].Script.applyDripIrri(7.3);
          2003-01-03  [DripIrrigator].Script.applyDripIrri(7.3);
          2003-01-08  [DripIrrigator].Script.applyDripIrri(7.3);
          2003-01-09  [DripIrrigator].Script.applyDripIrri(7.3);
          2003-01-11  [DripIrrigator].Script.applyDripIrri(7.3);
          2003-01-15  [DripIrrigator].Script.applyDripIrri(7.3);
          2003-01-18  [DripIrrigator].Script.applyDripIrri(7.3);
          2003-01-23  [DripIrrigator].Script.applyDripIrri(7.3);
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          2003-12-03  [DripIrrigator].Script.applyDripIrri(5.2);
          2003-12-07  [DripIrrigator].Script.applyDripIrri(7);
          2004-02-05  [DripIrrigator].Script.applyDripIrri(3.5);
          2005-02-26  [DripIrrigator].Script.applyDripIrri(6.9);
        Operations 60
          2002-02-14  [DripIrrigator].Script.applyDripIrri(6.3);
          2002-02-17  [DripIrrigator].Script.applyDripIrri(6.3);
          2002-02-19  [DripIrrigator].Script.applyDripIrri(6.3);
          2002-02-21  [DripIrrigator].Script.applyDripIrri(6.3);
          2002-02-25  [DripIrrigator].Script.applyDripIrri(6.3);
          2002-02-26  [DripIrrigator].Script.applyDripIrri(6.3);
          2002-03-03  [DripIrrigator].Script.applyDripIrri(6.3);
          2002-03-05  [DripIrrigator].Script.applyDripIrri(6.3);
          2002-03-07  [DripIrrigator].Script.applyDripIrri(6.3);
          2002-03-10  [DripIrrigator].Script.applyDripIrri(6.3);
          2002-03-12  [DripIrrigator].Script.applyDripIrri(6.3);
          2002-03-14  [DripIrrigator].Script.applyDripIrri(6.3);
          2002-03-19  [DripIrrigator].Script.applyDripIrri(6.3);
          2002-03-21  [DripIrrigator].Script.applyDripIrri(6.3);
          2002-03-24  [DripIrrigator].Script.applyDripIrri(6.3);
          2002-03-26  [DripIrrigator].Script.applyDripIrri(6.3);
          2002-04-01  [DripIrrigator].Script.applyDripIrri(6.3);
          2002-04-07  [DripIrrigator].Script.applyDripIrri(6.3);
          2002-04-10  [DripIrrigator].Script.applyDripIrri(6.3);
          2002-04-18  [DripIrrigator].Script.applyDripIrri(6.3);
          2002-04-21  [DripIrrigator].Script.applyDripIrri(6.3);
          2002-10-05  [DripIrrigator].Script.applyDripIrri(4.4);
          2002-10-08  [DripIrrigator].Script.applyDripIrri(4.4);
          2002-10-10  [DripIrrigator].Script.applyDripIrri(4.4);
          2002-10-12  [DripIrrigator].Script.applyDripIrri(4.4);
          2002-10-18  [DripIrrigator].Script.applyDripIrri(4.4);
          2002-10-23  [DripIrrigator].Script.applyDripIrri(4.4);
          2002-10-26  [DripIrrigator].Script.applyDripIrri(4.4);
          2002-10-28  [DripIrrigator].Script.applyDripIrri(4.4);
          2002-11-05  [DripIrrigator].Script.applyDripIrri(4.4);
          2002-11-08  [DripIrrigator].Script.applyDripIrri(4.4);
          2002-11-11  [DripIrrigator].Script.applyDripIrri(4.4);
          2002-11-18  [DripIrrigator].Script.applyDripIrri(4.4);
          2002-11-20  [DripIrrigator].Script.applyDripIrri(4.4);
          2002-11-23  [DripIrrigator].Script.applyDripIrri(4.4);
          2002-11-25  [DripIrrigator].Script.applyDripIrri(4.4);
          2002-11-29  [DripIrrigator].Script.applyDripIrri(4.4);
          2002-12-04  [DripIrrigator].Script.applyDripIrri(4.4);
          2002-12-09  [DripIrrigator].Script.applyDripIrri(4.4);
          2002-12-11  [DripIrrigator].Script.applyDripIrri(4.4);
          2002-12-19  [DripIrrigator].Script.applyDripIrri(4.4);
          2002-12-27  [DripIrrigator].Script.applyDripIrri(4.4);
          2002-12-31  [DripIrrigator].Script.applyDripIrri(4.4);
          2003-01-03  [DripIrrigator].Script.applyDripIrri(4.4);
          2003-01-08  [DripIrrigator].Script.applyDripIrri(4.4);
          2003-01-09  [DripIrrigator].Script.applyDripIrri(4.4);
          2003-01-11  [DripIrrigator].Script.applyDripIrri(4.4);
          2003-01-15  [DripIrrigator].Script.applyDripIrri(4.4);
          2003-01-18  [DripIrrigator].Script.applyDripIrri(4.4);
          2003-01-23  [DripIrrigator].Script.applyDripIrri(4.4);
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          2003-12-03  [DripIrrigator].Script.applyDripIrri(3.1);
          2003-12-07  [DripIrrigator].Script.applyDripIrri(4.2);
          2004-02-05  [DripIrrigator].Script.applyDripIrri(2.1);
          2005-02-26  [DripIrrigator].Script.applyDripIrri(4.1);
    Simulation Squire_1
      Clock: StartDate=2001-07-01; EndDate=2003-07-01
      Summary SummaryFile
      Weather: FileName=Site1004_RPC.met
      MicroClimate: a_interception=0; b_interception=1; c_interception=0; d_interception=0; soil_albedo=0.3; SoilHeatFluxFraction=0.4; NightInterceptionFraction=0.5; ReferenceHeight=2
      SoilArbitrator Soil Arbitrator
      RectangularZone Row: Length=100; Width=0.9; Slope=0
        Report: EventNames=[Clock].DoReport
        SurfaceOrganicMatter: InitialResidueName=wheat_stubble; InitialResidueType=wheat; InitialResidueMass=500; InitialStandingFraction=0; InitialCPR=0; InitialCNR=100; FractionFaecesAdded=0.5
        Plant SimpleFruitTree: CropType=Slurp; IsEnding=false; DaysAfterEnding=0
        Fertiliser
        Irrigation
        Manager TreeInitialisation
          CultivarName = Grape_4Cane
          SowingDate = 2001-07-01
          StartAge = 9
          KLReductionFactor = -0.0005
          KLReductionDepth = 150
          YKLModifiers =
          XDepth =
          MaxG = 0.006
          R50 = 100
```csharp
using System;
using Models.Core;
using Models.PMF;
using APSIM.Shared.Utilities;
using Models.Soils;
        
namespace Models
{
    [Serializable] 
    [System.Xml.Serialization.XmlInclude(typeof(Model))]
    public class Script : Model
    {
        [Link] Plant SimpleFruitTree;
        [Link] Clock Clock;
        [Link] Soil Soil;
        [Link] Zone zone;

        [Display(Type = DisplayType.CultivarName)]
        [Description("Plant Type")]
        public string CultivarName { get; set; }
        [Description("Initialisation Date")]
        public DateTime SowingDate { get; set; }
        [Description("Age of trees (in Years) at start of simulation)")]
        public int StartAge {get;set;}

        [Description("Factor to change Kl modifier with Depth")]
        public double KLReductionFactor { get; set; }
        [Description("Depth that KL starts to decline")]
        public double KLReductionDepth { get; set; }
        
        public double[] YKLModifiers { get; set; }
        public double[] XDepth { get; set; }
        private double Depth { get; set; }
        
        [Description("Maximum Stomatal Conductance")]
        public double MaxG { get; set; }
        [Description("Stomatal Radn response")]
        public double R50 { get; set; }

        [EventSubscribe("DoManagement")]
        private void OnDoManagement(object sender, EventArgs e)
        {
            if (Clock.Today.Date == SowingDate)
            {
            	double maxRootDepth = (double)zone.Get("SimpleFruitTree.Root.MaximumRootDepth.FixedValue");
            	double initialRootDepth = Math.Min(1,StartAge/6) * maxRootDepth;
                SimpleFruitTree.Sow(cultivar: CultivarName, population: 1, depth: initialRootDepth, rowSpacing: 3000);
                object StartAgeValue = StartAge;
                zone.Set("SimpleFruitTree.Phenology.Age.Years",StartAgeValue);
                YKLModifiers = new double[Soil.Thickness.Length];
                XDepth = new double[Soil.Thickness.Length];
                Depth = 0;
                for (int layer = 0; layer < Soil.Thickness.Length; layer++)
                {
                    Depth += Soil.Thickness[layer] / 2;  //Add half of the thickness of the current layer so depth is the mid depth of that layer
                    if (Depth <= KLReductionDepth)
                    {
                        YKLModifiers[layer] = 1;
                        XDepth[layer] = Depth;
                    }
                    else
                    {
                        double KLMod = 1 * Math.Exp(-KLReductionFactor * (Depth - KLReductionDepth));
                        YKLModifiers[layer] = KLMod;
                        XDepth[layer] = Depth;
                    }
                    Depth += Soil.Thickness[layer] / 2;  //Add the other half of the current layer so depth is the top of the next layer
                }
                object KLMods = YKLModifiers;
                zone.Set("SimpleFruitTree.Root.KLModifier.XYPairs.Y", KLMods);
                object Depths = XDepth;
                zone.Set("SimpleFruitTree.Root.KLModifier.XYPairs.X", Depths);
                object GMaxValue = MaxG;
                zone.Set("SimpleFruitTree.Leaf.Gsmax350", GMaxValue); 
                object R50Value = R50; 
                zone.Set("SimpleFruitTree.Leaf.R50", R50Value); 
            }
        }
    }
}
```
        Manager SetupTreeRootZones: same as Peach.Row.SetupTreeRootZones
        Manager FrostDamage
          FrostDate = 2001-10-13
          FrostDate2 = 2002-10-03
          FrostDate3 = 2002-11-18
```csharp
using System;
using Models.Core;
using Models.PMF;
using APSIM.Shared.Utilities;
using Models.Soils;
        
namespace Models
{
    [Serializable] 
    [System.Xml.Serialization.XmlInclude(typeof(Model))]
    public class Script : Model
    {
        [Link] Plant SimpleFruitTree;
        [Link] Clock Clock;
        [Link] Soil Soil;
        [Link] Zone zone;

        [Description("Frost Date")]
        public DateTime FrostDate { get; set; }
        [Description("Frost Date")]
        public DateTime FrostDate2 { get; set; }
        [Description("Frost Date")]
        public DateTime FrostDate3 { get; set; }

        [EventSubscribe("DoManagement")]
        private void OnDoManagement(object sender, EventArgs e)
        {
            if (Clock.Today.Date == FrostDate) 
            {
            	double FrostMultiplier = 0.6;
            	object FrostMultiplierValue = FrostMultiplier;
            	zone.Set("SimpleFruitTree.Leaf.LAIFunction.FrostFactor.FixedValue",FrostMultiplierValue);
            }
            if (Clock.Today.Date == FrostDate2)
            {
            	double FrostMultiplier = 0.6;
            	object FrostMultiplierValue = FrostMultiplier;
            	zone.Set("SimpleFruitTree.Leaf.LAIFunction.FrostFactor.FixedValue",FrostMultiplierValue);
            }
            if (Clock.Today.Date == FrostDate3)
            {
            	double FrostMultiplier = 0.4;
            	object FrostMultiplierValue = FrostMultiplier;
            	zone.Set("SimpleFruitTree.Leaf.LAIFunction.FrostFactor.FixedValue",FrostMultiplierValue);
            }
        }
    }
}
```
        Operations VineIrrigation
        Soil: Latitude=0; Longitude=0
          LayerStructure: Thickness=[200, 200, 200, 200, 200, 200, 400, 400, 400, 600]
          Analysis: same as Peach.Row.Soil.Analysis
          InitialWater Initial water: PercentMethod=1; FractionFull=1; RelativeTo=LL15
          Water
            Thickness  BD    AirDry  LL15  DUL   SAT
            200        1.35  0.1     0.2   0.35  0.45
            250        1.35  0.1     0.2   0.35  0.45
            300        1.4   0.15    0.15  0.35  0.4
            150        1.4   0.13    0.13  0.33  0.35
            150        1.4   0.1     0.1   0.28  0.35
            1950       1.59  0.06    0.06  0.1   0.3
            SoilCrop SimpleFruitTreeSoil: LL=[0.2, 0.2, 0.15, 0.13, 0.1, 0.06]; KL=[0.25, 0.1, 0.08, 0.05, 0.05, 0.01]; XF=[1, 1, 1, 1, 1, 1]
            SoilCrop SlurpSoil: LL=[0.2, 0.2, 0.15, 0.13, 0.1, 0.06]; KL=[0.11, 0.11, 0.11, 0.11, 0.11, 0.11]; XF=[1, 1, 1, 1, 1, 1]
          SoilWater: SummerDate=1-Nov; SummerU=4; SummerCona=1; WinterDate=1-Apr; WinterU=4; WinterCona=1; DiffusConst=88; DiffusSlope=35.4; Salb=0.18; CN2Bare=68; CNRed=20; CNCov=0.8; slope=0; discharge_width=0; catchment_area=0; max_pond=0; ResidueInterception=0
            Thickness  SWCON  KLAT
            150        0.55   0
            150        0.55   0
            100        0.55   0
            200        0.55   0
            200        0.55   0
            200        0.55   0
            200        0.55   0
            200        0.55   0
            200        0.55   0
            200        0.55   0
            200        0.55   0
            200        0.55   0
            400        0.55   0
          SoilNitrogen: same as Peach.Row.Soil.SoilNitrogen
          SoilOrganicMatter: same as Peach.Row.Soil.SoilOrganicMatter
          Sample Initial nitrogen: NO3Units=kg/ha; NH4Units=ppm; SWUnits=Volumetric; OCUnits=Total; PHUnits=Water
            Thickness  NO3  NH4
            100        217  0
            200        30   0
            300        5    0
            300        5    0
            300        0    0
            300        0    0
          CERESSoilTemperature
          OutputLayers: Thickness=[150, 150, 150, 150, 150, 150, 150]
        Operations WinterRainfall
          2002-05-28  [Irrigation].Apply(200);
        Manager ChangeSoilProperty
          RelocationDate = 0001-01-01
```csharp
using System;
using Models.Core;
using System.Collections.Generic;
using System.Text;
using Models.Soils;
using Models.PMF;
using Models;
using System.Xml.Serialization;
using APSIM.Shared.Utilities;

namespace Models
{
    [Serializable] 
    public class Script : Model
    {
    	[Link] Clock clock;
    	[Link] Soil soil;

   		[Description("Relocation date")]
   		public DateTime RelocationDate {get; set;}

   		[EventSubscribe("StartOfDay")]
        private void OnStartOfDay(object sender, EventArgs e)
        {
        	if(clock.Today.Date == RelocationDate) 
        	{
        		soil.DUL[0] = 0.28;
        		soil.DUL[1] = 0.28;
        		soil.DUL[2] = 0.28;
        		soil.DUL[3] = 0.28;
        		soil.DUL[4] = 0.28;

        		soil.LL15[0] = 0.12;
        		soil.LL15[1] = 0.1;
        		soil.LL15[2] = 0.1;
        		soil.LL15[3] = 0.1;
        		soil.LL15[4] = 0.08;

        	}

         }


   		
    }
}
```
        Manager PlantVariables
          script: same as in Peach.Row.PlantVariables
        Manager DripIrrigator
          totalIrrigation = 0
```csharp
using System;
using Models.Core;
using System.Collections.Generic;
using System.Text;
using Models.Soils;
using Models.PMF;
using Models;
using System.Xml.Serialization;
using APSIM.Shared.Utilities;

namespace Models
{
    [Serializable] 
    public class Script : Model
    {
       [Link] Irrigation irrigation;
        public void applyDripIrri(double amount)
        {
        	double layerAmount = amount/4;
        	irrigation.Apply(layerAmount, 0);
        	irrigation.Apply(layerAmount*2, 220);
        	irrigation.Apply(layerAmount, 420);

        }
        public double totalIrrigation {get; set;}
        [EventSubscribe("Irrigated")]
        private void OnIrrigated(object sender, 
        IrrigationApplicationType irrigData)
        {
        	totalIrrigation += irrigData.Amount;
         }
    }
}
```
        Manager HarvestNPrune: same as Kiwifruit.Row.HarvestNPrune
      RectangularZone Alley: Length=100; Width=1.5; Slope=0
        Report: EventNames=[Clock].DoReport
        SurfaceOrganicMatter: InitialResidueName=wheat_stubble; InitialResidueType=wheat; InitialResidueMass=500; InitialStandingFraction=0; InitialCPR=0; InitialCNR=100; FractionFaecesAdded=0.5
        Plant Slurp: CropType=Slurp; IsEnding=false; DaysAfterEnding=0
        Fertiliser
        Irrigation
        Manager PastureInitialisation
          CultivarName = StaticCrop
          InitialRootDepth = 2000
          SowingDate = 2001-07-01
          RootDepth = 2000
          RFV = 10
          KLReductionFactor = -0.001
          KLReductionDepth = 150
          YKLModifiers =
          XDepth =
          MaxG = 0.004
          R50 = 150
          script: same as in Peach.Alley.PastureInitialisation
        Manager SetPastureVariables
          Ext_coef = 0.6
          MaximumHeight = 300
          MinimumHeight = 100
          Cover = 0
          LAI = 0
```csharp
using System;
using Models.Core;
using System.Collections.Generic;
using System.Text;
using Models.PMF;
using Models;
using System.Xml.Serialization;
using APSIM.Shared.Utilities;
using System.Data;

namespace Models
{
    [Serializable] 
    //[System.Xml.Serialization.XmlInclude(typeof(Model))]
    public class Script : Model
    {
        [Link] Plant Slurp;
        [Link] Clock Clock;
        [Link] Zone zone;
        [Link] Weather weather;

        
        [Description("Extinction coefficient")]
        public  double Ext_coef { get; set; }
        [Description("Maximum height of leaves")]
        public double MaximumHeight { get; set; }
        [Description("Minimum height of leaves")]
        public double MinimumHeight { get; set; }
        
        public double Cover {get; private set;}
        public double LAI { get; private set; }
                
        [EventSubscribe("StartOfSimulation")]
        private void OnStartOfSimulation(object sender, EventArgs e)
        {
        	Cover = 0.5;
        }
        
        [EventSubscribe("StartOfDay")]
        private void OnStartOfDay(object sender, EventArgs e)
        {
            Cover += weather.MeanT * 0.001;

            if (Cover >= 1.0)
            {
            	Cover = 0.5;        
            }

          	LAI = Math.Log(1 - Cover) / -Ext_coef;

            object LAIResetValue = LAI;
            zone.Set("Slurp.Leaf.LAIFunction.FixedValue", LAIResetValue);  
            object HeightResetValue = MinimumHeight + Cover * (MaximumHeight-MinimumHeight);
            zone.Set("Slurp.Leaf.HeightFunction.FixedValue", HeightResetValue);  
        }
    }
}
```
        Manager SetupPastureRootZones
          UseExtraZone = True
          script: same as in Peach.Alley.SetupPastureRootZones
        Soil: Latitude=0; Longitude=0
          LayerStructure: Thickness=[200, 200, 200, 200, 200, 200, 400, 400, 400, 600]
          Analysis: same as Peach.Row.Soil.Analysis
          InitialWater Initial water: PercentMethod=1; FractionFull=1.00166; RelativeTo=LL15
          SoilWater: same as Grape_Squire_1.Squire_1.Row.Soil.SoilWater
          SoilNitrogen: same as Peach.Row.Soil.SoilNitrogen
          SoilOrganicMatter: same as Peach.Row.Soil.SoilOrganicMatter
          Sample Initial nitrogen: NO3Units=kg/ha; NH4Units=ppm; SWUnits=Volumetric; OCUnits=Total; PHUnits=Water
            Thickness  NO3  NH4
            100        217  0
            200        30   0
            300        5    0
            300        5    0
            300        0    0
            300        0    0
          CERESSoilTemperature
          OutputLayers: Thickness=[150, 150, 150, 150, 150, 150, 150]
          Water: same as Grape_Squire_1.Squire_1.Row.Soil.Water
        Operations WinterRainfall
          2002-05-28  [Irrigation].Apply(200);
        Manager PlantVariables
          script: same as in Peach.Row.PlantVariables
  Experiment Grape_Squire_2
    DisabledSimNames=[Grape_Squire_2Irri40, Grape_Squire_2Irri80, Grape_SquireIrri20, Grape_SquireIrri40, Grape_SquireIrri70, Grape_SquireIrri80]
    Factors
      Factor Irri: Specification=[VineIrrigation]
        Operations 20
          2002-02-14  [DripIrrigator].Script.applyDripIrri(2.1);
          2002-02-17  [DripIrrigator].Script.applyDripIrri(2.1);
          2002-02-19  [DripIrrigator].Script.applyDripIrri(2.1);
          2002-02-21  [DripIrrigator].Script.applyDripIrri(2.1);
          2002-02-25  [DripIrrigator].Script.applyDripIrri(2.1);
          2002-02-26  [DripIrrigator].Script.applyDripIrri(2.1);
          2002-03-03  [DripIrrigator].Script.applyDripIrri(2.1);
          2002-03-05  [DripIrrigator].Script.applyDripIrri(2.1);
          2002-03-07  [DripIrrigator].Script.applyDripIrri(2.1);
          2002-03-10  [DripIrrigator].Script.applyDripIrri(2.1);
          2002-03-12  [DripIrrigator].Script.applyDripIrri(2.1);
          2002-03-14  [DripIrrigator].Script.applyDripIrri(2.1);
          2002-03-19  [DripIrrigator].Script.applyDripIrri(2.1);
          2002-03-21  [DripIrrigator].Script.applyDripIrri(2.1);
          2002-03-24  [DripIrrigator].Script.applyDripIrri(2.1);
          2002-03-26  [DripIrrigator].Script.applyDripIrri(2.1);
          2002-04-01  [DripIrrigator].Script.applyDripIrri(2.1);
          2002-04-07  [DripIrrigator].Script.applyDripIrri(2.1);
          2002-04-10  [DripIrrigator].Script.applyDripIrri(2.1);
          2002-04-18  [DripIrrigator].Script.applyDripIrri(2.1);
          2002-04-21  [DripIrrigator].Script.applyDripIrri(2.1);
          2002-10-05  [DripIrrigator].Script.applyDripIrri(1.5);
          2002-10-08  [DripIrrigator].Script.applyDripIrri(1.5);
          2002-10-10  [DripIrrigator].Script.applyDripIrri(1.5);
          2002-10-12  [DripIrrigator].Script.applyDripIrri(1.5);
          2002-10-18  [DripIrrigator].Script.applyDripIrri(1.5);
          2002-10-23  [DripIrrigator].Script.applyDripIrri(1.5);
          2002-10-26  [DripIrrigator].Script.applyDripIrri(1.5);
          2002-10-28  [DripIrrigator].Script.applyDripIrri(1.5);
          2002-11-05  [DripIrrigator].Script.applyDripIrri(1.5);
          2002-11-08  [DripIrrigator].Script.applyDripIrri(1.5);
          2002-11-11  [DripIrrigator].Script.applyDripIrri(1.5);
          2002-11-18  [DripIrrigator].Script.applyDripIrri(1.5);
          2002-11-20  [DripIrrigator].Script.applyDripIrri(1.5);
          2002-11-23  [DripIrrigator].Script.applyDripIrri(1.5);
          2002-11-25  [DripIrrigator].Script.applyDripIrri(1.5);
          2002-11-29  [DripIrrigator].Script.applyDripIrri(1.5);
          2002-12-04  [DripIrrigator].Script.applyDripIrri(1.5);
          2002-12-09  [DripIrrigator].Script.applyDripIrri(1.5);
          2002-12-11  [DripIrrigator].Script.applyDripIrri(1.5);
          2002-12-19  [DripIrrigator].Script.applyDripIrri(1.5);
          2002-12-27  [DripIrrigator].Script.applyDripIrri(1.5);
          2002-12-31  [DripIrrigator].Script.applyDripIrri(1.5);
          2003-01-03  [DripIrrigator].Script.applyDripIrri(1.5);
          2003-01-08  [DripIrrigator].Script.applyDripIrri(1.5);
          2003-01-09  [DripIrrigator].Script.applyDripIrri(1.5);
          2003-01-11  [DripIrrigator].Script.applyDripIrri(1.5);
          2003-01-15  [DripIrrigator].Script.applyDripIrri(1.5);
          2003-01-18  [DripIrrigator].Script.applyDripIrri(1.5);
          2003-01-23  [DripIrrigator].Script.applyDripIrri(1.5);
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          2003-12-03  [DripIrrigator].Script.applyDripIrri(1);
          2003-12-07  [DripIrrigator].Script.applyDripIrri(1.4);
          2004-02-05  [DripIrrigator].Script.applyDripIrri(0.7);
          2004-12-18  [DripIrrigator].Script.applyDripIrri(1.6);
        Operations 100
          2002-02-14  [DripIrrigator].Script.applyDripIrri(6.3);
          2002-02-17  [DripIrrigator].Script.applyDripIrri(6.3);
          2002-02-19  [DripIrrigator].Script.applyDripIrri(6.3);
          2002-02-21  [DripIrrigator].Script.applyDripIrri(6.3);
          2002-02-25  [DripIrrigator].Script.applyDripIrri(6.3);
          2002-02-26  [DripIrrigator].Script.applyDripIrri(6.3);
          2002-03-03  [DripIrrigator].Script.applyDripIrri(6.3);
          2002-03-05  [DripIrrigator].Script.applyDripIrri(6.3);
          2002-03-07  [DripIrrigator].Script.applyDripIrri(6.3);
          2002-03-10  [DripIrrigator].Script.applyDripIrri(6.3);
          2002-03-12  [DripIrrigator].Script.applyDripIrri(6.3);
          2002-03-14  [DripIrrigator].Script.applyDripIrri(6.3);
          2002-03-19  [DripIrrigator].Script.applyDripIrri(6.3);
          2002-03-21  [DripIrrigator].Script.applyDripIrri(6.3);
          2002-03-24  [DripIrrigator].Script.applyDripIrri(6.3);
          2002-03-26  [DripIrrigator].Script.applyDripIrri(6.3);
          2002-04-01  [DripIrrigator].Script.applyDripIrri(6.3);
          2002-04-07  [DripIrrigator].Script.applyDripIrri(6.3);
          2002-04-10  [DripIrrigator].Script.applyDripIrri(6.3);
          2002-04-18  [DripIrrigator].Script.applyDripIrri(6.3);
          2002-04-21  [DripIrrigator].Script.applyDripIrri(6.3);
          2002-10-05  [DripIrrigator].Script.applyDripIrri(4.4);
          2002-10-08  [DripIrrigator].Script.applyDripIrri(4.4);
          2002-10-10  [DripIrrigator].Script.applyDripIrri(4.4);
          2002-10-12  [DripIrrigator].Script.applyDripIrri(4.4);
          2002-10-18  [DripIrrigator].Script.applyDripIrri(4.4);
          2002-10-23  [DripIrrigator].Script.applyDripIrri(4.4);
          2002-10-26  [DripIrrigator].Script.applyDripIrri(4.4);
          2002-10-28  [DripIrrigator].Script.applyDripIrri(4.4);
          2002-11-05  [DripIrrigator].Script.applyDripIrri(4.4);
          2002-11-08  [DripIrrigator].Script.applyDripIrri(4.4);
          2002-11-11  [DripIrrigator].Script.applyDripIrri(4.4);
          2002-11-18  [DripIrrigator].Script.applyDripIrri(4.4);
          2002-11-20  [DripIrrigator].Script.applyDripIrri(4.4);
          2002-11-23  [DripIrrigator].Script.applyDripIrri(4.4);
          2002-11-25  [DripIrrigator].Script.applyDripIrri(4.4);
          2002-11-29  [DripIrrigator].Script.applyDripIrri(4.4);
          2002-12-04  [DripIrrigator].Script.applyDripIrri(4.4);
          2002-12-09  [DripIrrigator].Script.applyDripIrri(4.4);
          2002-12-11  [DripIrrigator].Script.applyDripIrri(4.4);
          2002-12-19  [DripIrrigator].Script.applyDripIrri(4.4);
          2002-12-27  [DripIrrigator].Script.applyDripIrri(4.4);
          2002-12-31  [DripIrrigator].Script.applyDripIrri(4.4);
          2003-01-03  [DripIrrigator].Script.applyDripIrri(4.4);
          2003-01-08  [DripIrrigator].Script.applyDripIrri(4.4);
          2003-01-09  [DripIrrigator].Script.applyDripIrri(4.4);
          2003-01-11  [DripIrrigator].Script.applyDripIrri(4.4);
          2003-01-15  [DripIrrigator].Script.applyDripIrri(4.4);
          2003-01-18  [DripIrrigator].Script.applyDripIrri(4.4);
          2003-01-23  [DripIrrigator].Script.applyDripIrri(4.4);
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          2003-12-03  [DripIrrigator].Script.applyDripIrri(3.1);
          2003-12-07  [DripIrrigator].Script.applyDripIrri(4.2);
          2004-02-05  [DripIrrigator].Script.applyDripIrri(2.1);
          2005-02-26  [DripIrrigator].Script.applyDripIrri(4.1);
        Operations 60
          2002-02-14  [DripIrrigator].Script.applyDripIrri(6.3);
          2002-02-17  [DripIrrigator].Script.applyDripIrri(6.3);
          2002-02-19  [DripIrrigator].Script.applyDripIrri(6.3);
          2002-02-21  [DripIrrigator].Script.applyDripIrri(6.3);
          2002-02-25  [DripIrrigator].Script.applyDripIrri(6.3);
          2002-02-26  [DripIrrigator].Script.applyDripIrri(6.3);
          2002-03-03  [DripIrrigator].Script.applyDripIrri(6.3);
          2002-03-05  [DripIrrigator].Script.applyDripIrri(6.3);
          2002-03-07  [DripIrrigator].Script.applyDripIrri(6.3);
          2002-03-10  [DripIrrigator].Script.applyDripIrri(6.3);
          2002-03-12  [DripIrrigator].Script.applyDripIrri(6.3);
          2002-03-14  [DripIrrigator].Script.applyDripIrri(6.3);
          2002-03-19  [DripIrrigator].Script.applyDripIrri(6.3);
          2002-03-21  [DripIrrigator].Script.applyDripIrri(6.3);
          2002-03-24  [DripIrrigator].Script.applyDripIrri(6.3);
          2002-03-26  [DripIrrigator].Script.applyDripIrri(6.3);
          2002-04-01  [DripIrrigator].Script.applyDripIrri(6.3);
          2002-04-07  [DripIrrigator].Script.applyDripIrri(6.3);
          2002-04-10  [DripIrrigator].Script.applyDripIrri(6.3);
          2002-04-18  [DripIrrigator].Script.applyDripIrri(6.3);
          2002-04-21  [DripIrrigator].Script.applyDripIrri(6.3);
          2002-10-05  [DripIrrigator].Script.applyDripIrri(4.4);
          2002-10-08  [DripIrrigator].Script.applyDripIrri(4.4);
          2002-10-10  [DripIrrigator].Script.applyDripIrri(4.4);
          2002-10-12  [DripIrrigator].Script.applyDripIrri(4.4);
          2002-10-18  [DripIrrigator].Script.applyDripIrri(4.4);
          2002-10-23  [DripIrrigator].Script.applyDripIrri(4.4);
          2002-10-26  [DripIrrigator].Script.applyDripIrri(4.4);
          2002-10-28  [DripIrrigator].Script.applyDripIrri(4.4);
          2002-11-05  [DripIrrigator].Script.applyDripIrri(4.4);
          2002-11-08  [DripIrrigator].Script.applyDripIrri(4.4);
          2002-11-11  [DripIrrigator].Script.applyDripIrri(4.4);
          2002-11-18  [DripIrrigator].Script.applyDripIrri(4.4);
          2002-11-20  [DripIrrigator].Script.applyDripIrri(4.4);
          2002-11-23  [DripIrrigator].Script.applyDripIrri(4.4);
          2002-11-25  [DripIrrigator].Script.applyDripIrri(4.4);
          2002-11-29  [DripIrrigator].Script.applyDripIrri(4.4);
          2002-12-04  [DripIrrigator].Script.applyDripIrri(4.4);
          2002-12-09  [DripIrrigator].Script.applyDripIrri(4.4);
          2002-12-11  [DripIrrigator].Script.applyDripIrri(4.4);
          2002-12-19  [DripIrrigator].Script.applyDripIrri(4.4);
          2002-12-27  [DripIrrigator].Script.applyDripIrri(4.4);
          2002-12-31  [DripIrrigator].Script.applyDripIrri(4.4);
          2003-01-03  [DripIrrigator].Script.applyDripIrri(4.4);
          2003-01-08  [DripIrrigator].Script.applyDripIrri(4.4);
          2003-01-09  [DripIrrigator].Script.applyDripIrri(4.4);
          2003-01-11  [DripIrrigator].Script.applyDripIrri(4.4);
          2003-01-15  [DripIrrigator].Script.applyDripIrri(4.4);
          2003-01-18  [DripIrrigator].Script.applyDripIrri(4.4);
          2003-01-23  [DripIrrigator].Script.applyDripIrri(4.4);
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          2003-12-03  [DripIrrigator].Script.applyDripIrri(3.1);
          2003-12-07  [DripIrrigator].Script.applyDripIrri(4.2);
          2004-02-05  [DripIrrigator].Script.applyDripIrri(2.1);
          2005-02-26  [DripIrrigator].Script.applyDripIrri(4.1);
          2004-12-18  [DripIrrigator].Script.applyDripIrri(4.8);
    Simulation Squire_2
      Clock: StartDate=2003-07-01; EndDate=2005-07-01
      Summary SummaryFile
      Weather: FileName=Site1004_RPC.met
      MicroClimate: a_interception=0; b_interception=1; c_interception=0; d_interception=0; soil_albedo=0.3; SoilHeatFluxFraction=0.4; NightInterceptionFraction=0.5; ReferenceHeight=2
      SoilArbitrator Soil Arbitrator
      RectangularZone Row: Length=100; Width=0.9; Slope=0
        Soil: Latitude=0; Longitude=0
          LayerStructure: Thickness=[200, 200, 200, 200, 200, 200, 400, 400, 400, 600]
          Analysis: same as Peach.Row.Soil.Analysis
          Water
            Thickness  BD    AirDry  LL15  DUL   SAT
            150        1.35  0.06    0.12  0.28  0.36
            750        1.4   0.1     0.1   0.28  0.36
            150        1.4   0.005   0.05  0.28  0.35
            150        1.4   0.05    0.05  0.28  0.35
            1950       1.5   0.06    0.06  0.15  0.3
            SoilCrop SimpleFruitTreeSoil: LL=[0.12, 0.1, 0.05, 0.05, 0.06]; KL=[0.1, 0.04, 0.03, 0.03, 0.02]; XF=[1, 1, 1, 1, 1]
            SoilCrop SlurpSoil: LL=[0.12, 0.1, 0.05, 0.05, 0.06]; KL=[0.1, 0.04, 0.01, 0, 0]; XF=[1, 1, 1, 1, 1]
          SoilWater: same as Grape_Squire_1.Squire_1.Row.Soil.SoilWater
          SoilNitrogen: same as Peach.Row.Soil.SoilNitrogen
          SoilOrganicMatter: same as Peach.Row.Soil.SoilOrganicMatter
          Sample Initial nitrogen: NO3Units=kg/ha; NH4Units=ppm; SWUnits=Volumetric; OCUnits=Total; PHUnits=Water
            Thickness  NO3  NH4
            100        217  0
            200        30   0
            300        5    0
            300        5    0
            300        0    0
            300        0    0
          CERESSoilTemperature
          OutputLayers: Thickness=[150, 150, 150, 150, 150, 150, 150]
          InitialWater: PercentMethod=0; FractionFull=0.8
        Report: EventNames=[Clock].DoReport
          VariableNames:
            [Clock].Today
            [SimpleFruitTree].Leaf.Height as height
            [SimpleFruitTree].Leaf.LAI as lai
            [AreaVariables].Script.FRadIntCanopy as f.rad.int
            [AreaVariables].Script.TranspCanopy as transpiration
            sum([Soil].SoilWater.SWmm[1:5]) as psw
            [Soil].OutputLayers.SW
            [SimpleFruitTree].Root.Depth as rootDepth
            [DripIrrigator].Script.totalIrrigation as Irrig
            sum of [Soil].SoilWater.Flux[7] from 2001-07-01 to 2005-07-01 as drainage
            [Soil].SoilWater.Es as Evaporation
        Report Drainage: EventNames=[Clock].DoReport
          VariableNames:
            [Clock].Today
            [Soil].SoilWater.SWmm
            [Soil].SoilWater.SWmm[6] + [Soil].SoilWater.SWmm[7] + [Soil].SoilWater.SWmm[8] + [Soil].SoilWater.SWmm[9] + [Soil].SoilWater.SWmm[10] as SW_belowRoots
        SurfaceOrganicMatter: InitialResidueName=wheat_stubble; InitialResidueType=wheat; InitialResidueMass=500; InitialStandingFraction=0; InitialCPR=0; InitialCNR=100; FractionFaecesAdded=0.5
        Plant SimpleFruitTree: CropType=Slurp; IsEnding=false; DaysAfterEnding=0
        Fertiliser
        Irrigation
        Manager TreeInitialisation
          CultivarName = Grape_4Cane
          SowingDate = 2003-07-01
          StartAge = 9
          KLReductionFactor = -0.0005
          KLReductionDepth = 150
          YKLModifiers =
          XDepth =
          MaxG = 0.006
          R50 = 100
          script: same as in Grape_Squire_1.Squire_1.Row.TreeInitialisation
        Manager SetupTreeRootZones: same as Peach.Row.SetupTreeRootZones
        Manager DripIrrigator
          totalIrrigation = 0
```csharp
using System;
using Models.Core;
using System.Collections.Generic;
using System.Text;
using Models.Soils;
using Models.PMF;
using Models;
using System.Xml.Serialization;
using APSIM.Shared.Utilities;

namespace Models
{
    [Serializable] 
    public class Script : Model
    {
       [Link] Irrigation irrigation;
        public void applyDripIrri(double amount)
        {
        	double layerAmount = amount/3;
        	irrigation.Apply(layerAmount, 0);
        	irrigation.Apply(layerAmount, 220);
        	irrigation.Apply(layerAmount, 420);

        }
        public double totalIrrigation {get; set;}
        [EventSubscribe("Irrigated")]
        private void OnIrrigated(object sender, 
        IrrigationApplicationType irrigData)
        {
        	totalIrrigation += irrigData.Amount;
         }
    }
}
```
        Operations VineIrrigation
        Operations WinterRainfall
          2004-06-24  [Irrigation].Apply(150);
        Manager PlantVariables
          script: same as in Peach.Row.PlantVariables
        Manager HarvestNPrune: same as Kiwifruit.Row.HarvestNPrune
      RectangularZone Alley: Length=100; Width=1.5; Slope=0
        Report: EventNames=[Clock].DoReport
          VariableNames:
            [Clock].Today
            [Slurp].Leaf.Height as height
            [Slurp].Leaf.LAI as lai
            [AreaVariables].Script.FRadIntUnderstory as f.rad.int
            [AreaVariables].Script.TranspUnderstory as transpiration
            sum([Soil].SoilWater.SWmm[1:5]) as psw
            [Soil].OutputLayers.SW
            [Soil].SoilWater.Es as Evaporation
        Report Drainage: EventNames=[Clock].DoReport
          VariableNames:
            [Clock].Today
            [Soil].SoilWater.SWmm[6] + [Soil].SoilWater.SWmm[7] + [Soil].SoilWater.SWmm[8] + [Soil].SoilWater.SWmm[9] + [Soil].SoilWater.SWmm[10] as SW_belowRoots
        SurfaceOrganicMatter: InitialResidueName=wheat_stubble; InitialResidueType=wheat; InitialResidueMass=500; InitialStandingFraction=0; InitialCPR=0; InitialCNR=100; FractionFaecesAdded=0.5
        Plant Slurp: CropType=Slurp; IsEnding=false; DaysAfterEnding=0
        Fertiliser
        Irrigation
        Manager PastureInitialisation
          CultivarName = StaticCrop
          InitialRootDepth = 2000
          SowingDate = 2003-07-01
          RootDepth = 2000
          RFV = 10
          KLReductionFactor = -0.001
          KLReductionDepth = 150
          YKLModifiers =
          XDepth =
          MaxG = 0.004
          R50 = 150
          script: same as in Peach.Alley.PastureInitialisation
        Manager SetPastureVariables: same as Grape_Squire_1.Squire_1.Alley.SetPastureVariables
        Manager SetupPastureRootZones: same as Grape_Squire_1.Squire_1.Alley.SetupPastureRootZones
        Operations WinterRainfall
          2004-06-24  [Irrigation].Apply(150);
        Soil: Latitude=0; Longitude=0
          LayerStructure: Thickness=[200, 200, 200, 200, 200, 200, 400, 400, 400, 600]
          Analysis: same as Peach.Row.Soil.Analysis
          SoilWater: same as Grape_Squire_1.Squire_1.Row.Soil.SoilWater
          SoilNitrogen: same as Peach.Row.Soil.SoilNitrogen
          SoilOrganicMatter: same as Peach.Row.Soil.SoilOrganicMatter
          Sample Initial nitrogen: NO3Units=kg/ha; NH4Units=ppm; SWUnits=Volumetric; OCUnits=Total; PHUnits=Water
            Thickness  NO3  NH4
            100        217  0
            200        30   0
            300        5    0
            300        5    0
            300        0    0
            300        0    0
          CERESSoilTemperature
          OutputLayers: Thickness=[150, 150, 150, 150, 150, 150, 150]
          InitialWater: PercentMethod=0; FractionFull=0.8
          Water
            Thickness  BD    AirDry  LL15  DUL   SAT
            150        1.35  0.06    0.12  0.28  0.36
            750        1.4   0.1     0.1   0.28  0.36
            150        1.4   0.005   0.05  0.28  0.35
            150        1.4   0.05    0.05  0.28  0.35
            1950       1.5   0.06    0.06  0.15  0.3
            SoilCrop SimpleFruitTreeSoil: LL=[0.12, 0.1, 0.05, 0.05, 0.06]; KL=[0.12, 0.05, 0.03, 0.03, 0.02]; XF=[1, 1, 1, 1, 1]
            SoilCrop SlurpSoil: LL=[0.12, 0.1, 0.05, 0.05, 0.06]; KL=[0.11, 0.11, 0.11, 0.11, 0.11]; XF=[1, 1, 1, 1, 1]
        Manager PlantVariables
          script: same as in Peach.Row.PlantVariables
  Experiment Grape_Seaview
    Factors
      Factor TSys
        CompositeFactor Grape_4Cane
          Specifications:
            [TreeInitialisation].Script.CultivarName = Grape_4Cane
            [VineIrrigation]
          Operations VineIrrigation
            2006-04-28  [DripIrrigator].Script.applyDripIrri(0.11);
            2006-06-12  [DripIrrigator].Script.applyDripIrri(1.23);
            2006-11-06  [DripIrrigator].Script.applyDripIrri(1.78);
            2006-11-13  [DripIrrigator].Script.applyDripIrri(1.71);
            2006-11-15  [DripIrrigator].Script.applyDripIrri(1.78);
            2006-11-17  [DripIrrigator].Script.applyDripIrri(1.73);
            2006-11-18  [DripIrrigator].Script.applyDripIrri(1.81);
            2006-11-20  [DripIrrigator].Script.applyDripIrri(0.97);
            2006-11-27  [DripIrrigator].Script.applyDripIrri(0.76);
            2006-11-29  [DripIrrigator].Script.applyDripIrri(1.73);
            2006-12-01  [DripIrrigator].Script.applyDripIrri(1.75);
            2006-12-02  [DripIrrigator].Script.applyDripIrri(1.78);
            2006-12-04  [DripIrrigator].Script.applyDripIrri(1.78);
            2006-12-06  [DripIrrigator].Script.applyDripIrri(3.91);
            2006-12-08  [DripIrrigator].Script.applyDripIrri(2.72);
            2006-12-09  [DripIrrigator].Script.applyDripIrri(2.74);
            2006-12-11  [DripIrrigator].Script.applyDripIrri(3.6);
            2006-12-13  [DripIrrigator].Script.applyDripIrri(0.35);
            2006-12-14  [DripIrrigator].Script.applyDripIrri(3.64);
            2006-12-15  [DripIrrigator].Script.applyDripIrri(4.15);
            2006-12-16  [DripIrrigator].Script.applyDripIrri(2.76);
            2006-12-17  [DripIrrigator].Script.applyDripIrri(2.74);
            2006-12-18  [DripIrrigator].Script.applyDripIrri(2.75);
            2006-12-19  [DripIrrigator].Script.applyDripIrri(2.74);
            2006-12-20  [DripIrrigator].Script.applyDripIrri(2.81);
            2006-12-21  [DripIrrigator].Script.applyDripIrri(2.75);
            2006-12-23  [DripIrrigator].Script.applyDripIrri(2.72);
            2006-12-24  [DripIrrigator].Script.applyDripIrri(2.73);
            2006-12-25  [DripIrrigator].Script.applyDripIrri(2.71);
            2006-12-26  [DripIrrigator].Script.applyDripIrri(2.77);
            2006-12-27  [DripIrrigator].Script.applyDripIrri(2.85);
            2006-12-28  [DripIrrigator].Script.applyDripIrri(2.82);
            2006-12-29  [DripIrrigator].Script.applyDripIrri(2.79);
            2006-12-30  [DripIrrigator].Script.applyDripIrri(2.8);
            2006-12-31  [DripIrrigator].Script.applyDripIrri(2.72);
            2007-01-01  [DripIrrigator].Script.applyDripIrri(2.69);
            2007-01-02  [DripIrrigator].Script.applyDripIrri(2.72);
            2007-01-03  [DripIrrigator].Script.applyDripIrri(2.69);
            2007-01-05  [DripIrrigator].Script.applyDripIrri(2.69);
            2007-01-06  [DripIrrigator].Script.applyDripIrri(2.73);
            2007-01-07  [DripIrrigator].Script.applyDripIrri(2.73);
            2007-01-08  [DripIrrigator].Script.applyDripIrri(2.78);
            2007-01-09  [DripIrrigator].Script.applyDripIrri(2.75);
            2007-01-11  [DripIrrigator].Script.applyDripIrri(2.69);
            2007-01-12  [DripIrrigator].Script.applyDripIrri(3.02);
            2007-01-13  [DripIrrigator].Script.applyDripIrri(2.78);
            2007-01-14  [DripIrrigator].Script.applyDripIrri(2.79);
            2007-01-15  [DripIrrigator].Script.applyDripIrri(2.81);
            2007-01-16  [DripIrrigator].Script.applyDripIrri(2.79);
            2007-01-18  [DripIrrigator].Script.applyDripIrri(2.75);
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            2007-01-22  [DripIrrigator].Script.applyDripIrri(0.93);
            2007-01-26  [DripIrrigator].Script.applyDripIrri(0.94);
            2007-01-27  [DripIrrigator].Script.applyDripIrri(2.2);
            2007-01-31  [DripIrrigator].Script.applyDripIrri(5.36);
            2007-02-01  [DripIrrigator].Script.applyDripIrri(2.52);
            2007-02-02  [DripIrrigator].Script.applyDripIrri(2.08);
            2007-02-03  [DripIrrigator].Script.applyDripIrri(5.97);
            2007-02-04  [DripIrrigator].Script.applyDripIrri(5.83);
            2007-02-05  [DripIrrigator].Script.applyDripIrri(1.83);
            2007-02-06  [DripIrrigator].Script.applyDripIrri(3.8);
            2007-02-09  [DripIrrigator].Script.applyDripIrri(6.02);
            2007-02-10  [DripIrrigator].Script.applyDripIrri(6.94);
            2007-02-12  [DripIrrigator].Script.applyDripIrri(5.98);
            2007-02-14  [DripIrrigator].Script.applyDripIrri(5.94);
            2007-02-16  [DripIrrigator].Script.applyDripIrri(3.94);
            2007-02-18  [DripIrrigator].Script.applyDripIrri(6.03);
            2007-02-19  [DripIrrigator].Script.applyDripIrri(4.65);
            2007-02-22  [DripIrrigator].Script.applyDripIrri(6.11);
            2007-02-23  [DripIrrigator].Script.applyDripIrri(3.73);
            2007-02-25  [DripIrrigator].Script.applyDripIrri(0.24);
            2007-02-26  [DripIrrigator].Script.applyDripIrri(3.89);
            2007-02-28  [DripIrrigator].Script.applyDripIrri(6.14);
            2007-03-01  [DripIrrigator].Script.applyDripIrri(0.99);
            2007-03-03  [DripIrrigator].Script.applyDripIrri(1.93);
            2007-03-04  [DripIrrigator].Script.applyDripIrri(1.34);
            2007-03-05  [DripIrrigator].Script.applyDripIrri(6.63);
            2007-03-06  [DripIrrigator].Script.applyDripIrri(14.88);
            2007-03-07  [DripIrrigator].Script.applyDripIrri(3.74);
            2007-03-08  [DripIrrigator].Script.applyDripIrri(10.81);
            2007-03-09  [DripIrrigator].Script.applyDripIrri(9.48);
            2007-03-10  [DripIrrigator].Script.applyDripIrri(4.97);
            2007-03-11  [DripIrrigator].Script.applyDripIrri(6.31);
            2007-03-12  [DripIrrigator].Script.applyDripIrri(7.36);
            2007-03-13  [DripIrrigator].Script.applyDripIrri(4.31);
            2007-03-14  [DripIrrigator].Script.applyDripIrri(4.51);
            2007-03-16  [DripIrrigator].Script.applyDripIrri(5.15);
            2007-03-17  [DripIrrigator].Script.applyDripIrri(6.37);
            2007-03-18  [DripIrrigator].Script.applyDripIrri(6.3);
            2007-03-19  [DripIrrigator].Script.applyDripIrri(5.2);
            2007-03-20  [DripIrrigator].Script.applyDripIrri(6.15);
            2007-03-21  [DripIrrigator].Script.applyDripIrri(5.67);
            2007-03-22  [DripIrrigator].Script.applyDripIrri(5.69);
            2007-03-23  [DripIrrigator].Script.applyDripIrri(6.21);
            2007-03-24  [DripIrrigator].Script.applyDripIrri(5.79);
            2007-03-26  [DripIrrigator].Script.applyDripIrri(6.06);
            2007-03-27  [DripIrrigator].Script.applyDripIrri(6.1);
            2007-03-30  [DripIrrigator].Script.applyDripIrri(6.35);
            2007-03-31  [DripIrrigator].Script.applyDripIrri(6.43);
            2007-04-02  [DripIrrigator].Script.applyDripIrri(5.8);
            2007-04-16  [DripIrrigator].Script.applyDripIrri(5.78);
            2007-04-17  [DripIrrigator].Script.applyDripIrri(3.4);
            2007-04-19  [DripIrrigator].Script.applyDripIrri(6.4);
            2007-11-09  [DripIrrigator].Script.applyDripIrri(2.19);
            2007-11-17  [DripIrrigator].Script.applyDripIrri(2.98);
            2007-11-19  [DripIrrigator].Script.applyDripIrri(0.21);
            2007-11-20  [DripIrrigator].Script.applyDripIrri(1.52);
            2007-11-22  [DripIrrigator].Script.applyDripIrri(3.04);
            2007-11-25  [DripIrrigator].Script.applyDripIrri(1.38);
            2007-11-27  [DripIrrigator].Script.applyDripIrri(1.77);
            2007-12-02  [DripIrrigator].Script.applyDripIrri(2.99);
        CompositeFactor Grape_2Cane
          Specifications:
            [TreeInitialisation].Script.CultivarName = Grape_2Cane
            [VineIrrigation]
          Operations VineIrrigation
            2006-06-12  [DripIrrigator].Script.applyDripIrri(0.16);
            2006-11-06  [DripIrrigator].Script.applyDripIrri(1.98);
            2006-11-13  [DripIrrigator].Script.applyDripIrri(1.95);
            2006-11-15  [DripIrrigator].Script.applyDripIrri(1.98);
            2006-11-17  [DripIrrigator].Script.applyDripIrri(2.25);
            2006-11-18  [DripIrrigator].Script.applyDripIrri(2.6);
            2006-11-20  [DripIrrigator].Script.applyDripIrri(1.1);
            2006-11-27  [DripIrrigator].Script.applyDripIrri(0.91);
            2006-11-29  [DripIrrigator].Script.applyDripIrri(1.96);
            2006-12-01  [DripIrrigator].Script.applyDripIrri(1.97);
            2006-12-02  [DripIrrigator].Script.applyDripIrri(1.97);
            2006-12-04  [DripIrrigator].Script.applyDripIrri(2.02);
            2006-12-06  [DripIrrigator].Script.applyDripIrri(4.56);
            2006-12-08  [DripIrrigator].Script.applyDripIrri(3.06);
            2006-12-09  [DripIrrigator].Script.applyDripIrri(3.02);
            2006-12-11  [DripIrrigator].Script.applyDripIrri(3.92);
            2006-12-13  [DripIrrigator].Script.applyDripIrri(0.44);
            2006-12-14  [DripIrrigator].Script.applyDripIrri(4.01);
            2006-12-15  [DripIrrigator].Script.applyDripIrri(4.6);
            2006-12-16  [DripIrrigator].Script.applyDripIrri(2.94);
            2006-12-17  [DripIrrigator].Script.applyDripIrri(3.03);
            2006-12-18  [DripIrrigator].Script.applyDripIrri(2.99);
            2006-12-19  [DripIrrigator].Script.applyDripIrri(3.01);
            2006-12-20  [DripIrrigator].Script.applyDripIrri(3.06);
            2006-12-21  [DripIrrigator].Script.applyDripIrri(2.99);
            2006-12-23  [DripIrrigator].Script.applyDripIrri(2.91);
            2006-12-24  [DripIrrigator].Script.applyDripIrri(2.98);
            2006-12-25  [DripIrrigator].Script.applyDripIrri(3.01);
            2006-12-26  [DripIrrigator].Script.applyDripIrri(3.02);
            2006-12-27  [DripIrrigator].Script.applyDripIrri(3.02);
            2006-12-28  [DripIrrigator].Script.applyDripIrri(2.98);
            2006-12-29  [DripIrrigator].Script.applyDripIrri(2.95);
            2006-12-30  [DripIrrigator].Script.applyDripIrri(3.05);
            2006-12-31  [DripIrrigator].Script.applyDripIrri(3);
            2007-01-01  [DripIrrigator].Script.applyDripIrri(2.94);
            2007-01-02  [DripIrrigator].Script.applyDripIrri(2.97);
            2007-01-03  [DripIrrigator].Script.applyDripIrri(2.94);
            2007-01-05  [DripIrrigator].Script.applyDripIrri(2.98);
            2007-01-06  [DripIrrigator].Script.applyDripIrri(3);
            2007-01-07  [DripIrrigator].Script.applyDripIrri(3.04);
            2007-01-08  [DripIrrigator].Script.applyDripIrri(3.01);
            2007-01-09  [DripIrrigator].Script.applyDripIrri(3.03);
            2007-01-11  [DripIrrigator].Script.applyDripIrri(3.16);
            2007-01-12  [DripIrrigator].Script.applyDripIrri(3.48);
            2007-01-13  [DripIrrigator].Script.applyDripIrri(3.17);
            2007-01-14  [DripIrrigator].Script.applyDripIrri(3.19);
            2007-01-15  [DripIrrigator].Script.applyDripIrri(3.08);
            2007-01-16  [DripIrrigator].Script.applyDripIrri(3.14);
            2007-01-18  [DripIrrigator].Script.applyDripIrri(3.03);
            2007-01-19  [DripIrrigator].Script.applyDripIrri(3.11);
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            2007-01-21  [DripIrrigator].Script.applyDripIrri(3.13);
            2007-01-22  [DripIrrigator].Script.applyDripIrri(1.25);
            2007-01-23  [DripIrrigator].Script.applyDripIrri(3.1);
            2007-01-25  [DripIrrigator].Script.applyDripIrri(3.09);
            2007-01-26  [DripIrrigator].Script.applyDripIrri(1.31);
            2007-01-27  [DripIrrigator].Script.applyDripIrri(2.56);
            2007-01-31  [DripIrrigator].Script.applyDripIrri(5.81);
            2007-02-01  [DripIrrigator].Script.applyDripIrri(2.92);
            2007-02-02  [DripIrrigator].Script.applyDripIrri(2.39);
            2007-02-03  [DripIrrigator].Script.applyDripIrri(6.59);
            2007-02-04  [DripIrrigator].Script.applyDripIrri(6.52);
            2007-02-05  [DripIrrigator].Script.applyDripIrri(2.19);
            2007-02-06  [DripIrrigator].Script.applyDripIrri(4.14);
            2007-02-09  [DripIrrigator].Script.applyDripIrri(6.62);
            2007-02-10  [DripIrrigator].Script.applyDripIrri(7.66);
            2007-02-12  [DripIrrigator].Script.applyDripIrri(6.54);
            2007-02-14  [DripIrrigator].Script.applyDripIrri(6.57);
            2007-02-16  [DripIrrigator].Script.applyDripIrri(4.35);
            2007-02-18  [DripIrrigator].Script.applyDripIrri(6.63);
            2007-02-19  [DripIrrigator].Script.applyDripIrri(5.37);
            2007-02-20  [DripIrrigator].Script.applyDripIrri(6.7);
            2007-02-22  [DripIrrigator].Script.applyDripIrri(6.58);
            2007-02-23  [DripIrrigator].Script.applyDripIrri(4.04);
            2007-02-25  [DripIrrigator].Script.applyDripIrri(3.36);
            2007-02-26  [DripIrrigator].Script.applyDripIrri(4.4);
            2007-02-28  [DripIrrigator].Script.applyDripIrri(6.6);
            2007-03-02  [DripIrrigator].Script.applyDripIrri(5.17);
            2007-03-03  [DripIrrigator].Script.applyDripIrri(2.15);
            2007-03-04  [DripIrrigator].Script.applyDripIrri(1.72);
            2007-03-05  [DripIrrigator].Script.applyDripIrri(7.11);
            2007-03-06  [DripIrrigator].Script.applyDripIrri(16.02);
            2007-03-07  [DripIrrigator].Script.applyDripIrri(4.23);
            2007-03-08  [DripIrrigator].Script.applyDripIrri(11.89);
            2007-03-09  [DripIrrigator].Script.applyDripIrri(10.39);
            2007-03-10  [DripIrrigator].Script.applyDripIrri(5.4);
            2007-03-11  [DripIrrigator].Script.applyDripIrri(6.82);
            2007-03-12  [DripIrrigator].Script.applyDripIrri(7.99);
            2007-03-13  [DripIrrigator].Script.applyDripIrri(4.94);
            2007-03-14  [DripIrrigator].Script.applyDripIrri(4.98);
            2007-03-16  [DripIrrigator].Script.applyDripIrri(5.68);
            2007-03-17  [DripIrrigator].Script.applyDripIrri(7.02);
            2007-03-18  [DripIrrigator].Script.applyDripIrri(7.36);
            2007-03-19  [DripIrrigator].Script.applyDripIrri(6.1);
            2007-03-20  [DripIrrigator].Script.applyDripIrri(6.92);
            2007-03-21  [DripIrrigator].Script.applyDripIrri(6.37);
            2007-03-22  [DripIrrigator].Script.applyDripIrri(6.38);
            2007-03-23  [DripIrrigator].Script.applyDripIrri(7.05);
            2007-03-25  [DripIrrigator].Script.applyDripIrri(6.94);
            2007-03-26  [DripIrrigator].Script.applyDripIrri(6.83);
            2007-03-27  [DripIrrigator].Script.applyDripIrri(6.88);
            2007-03-28  [DripIrrigator].Script.applyDripIrri(7.01);
            2007-03-30  [DripIrrigator].Script.applyDripIrri(7.29);
            2007-03-31  [DripIrrigator].Script.applyDripIrri(7.24);
            2007-04-01  [DripIrrigator].Script.applyDripIrri(5.8);
            2007-04-02  [DripIrrigator].Script.applyDripIrri(6.39);
            2007-04-04  [DripIrrigator].Script.applyDripIrri(6.51);
            2007-04-05  [DripIrrigator].Script.applyDripIrri(3.22);
            2007-04-10  [DripIrrigator].Script.applyDripIrri(2.96);
            2007-04-11  [DripIrrigator].Script.applyDripIrri(2.93);
            2007-04-12  [DripIrrigator].Script.applyDripIrri(4.29);
    Simulation Seaview
      Clock: StartDate=2006-07-01; EndDate=2007-07-01
      Summary SummaryFile
      Weather: FileName=Site1003_SEA.met
      MicroClimate: a_interception=0; b_interception=1; c_interception=0; d_interception=0; soil_albedo=0.3; SoilHeatFluxFraction=0.4; NightInterceptionFraction=0.5; ReferenceHeight=2
      SoilArbitrator Soil Arbitrator
      RectangularZone Row: Length=100; Width=0.9; Slope=0
        Soil: Latitude=0; Longitude=0
          LayerStructure: Thickness=[200, 200, 200, 200, 200, 200, 400, 400, 400, 600]
          Analysis: same as Peach.Row.Soil.Analysis
          Water
            Thickness  BD  AirDry  LL15  DUL   SAT
            300        1   0.3     0.3   0.5   0.6
            300        1   0.32    0.32  0.5   0.6
            300        1   0.18    0.18  0.35  0.5
            300        1   0.05    0.05  0.1   0.3
            1950       1   0.05    0.05  0.1   0.3
            SoilCrop SimpleFruitTreeSoil: LL=[0.3, 0.32, 0.18, 0.05, 0.05]; KL=[0.1, 0.01, 0.05, 0.005, 0]; XF=[1, 1, 1, 1, 1]
            SoilCrop SlurpSoil: LL=[0.3, 0.32, 0.18, 0.05, 0.05]; KL=[0.11, 0.11, 0.11, 0.11, 0.11]; XF=[1, 1, 1, 1, 1]
          SoilWater: same as Peach.Row.Soil.SoilWater
          SoilNitrogen: same as Peach.Row.Soil.SoilNitrogen
          SoilOrganicMatter: same as Peach.Row.Soil.SoilOrganicMatter
          Sample Initial nitrogen: NO3Units=kg/ha; NH4Units=ppm; SWUnits=Volumetric; OCUnits=Total; PHUnits=Water
            Thickness  NO3  NH4
            100        217  0
            200        30   0
            300        5    0
            300        5    0
            300        0    0
            300        0    0
          CERESSoilTemperature
          OutputLayers: Thickness=[300, 300, 300]
          InitialWater: PercentMethod=0; FractionFull=1
        Report: same as Grape_Squire_2.Squire_2.Row.Report
        SurfaceOrganicMatter: InitialResidueName=wheat_stubble; InitialResidueType=wheat; InitialResidueMass=500; InitialStandingFraction=0; InitialCPR=0; InitialCNR=100; FractionFaecesAdded=0.5
        Plant SimpleFruitTree: CropType=Slurp; IsEnding=false; DaysAfterEnding=0
        Fertiliser
        Irrigation
        Manager TreeInitialisation
          CultivarName = Grape_4Cane
          SowingDate = 2006-07-01
          StartAge = 9
          KLReductionFactor = -0.0005
          KLReductionDepth = 150
          YKLModifiers =
          XDepth =
          MaxG = 0.006
          R50 = 100
          script: same as in Grape_Squire_1.Squire_1.Row.TreeInitialisation
        Manager SetupTreeRootZones: same as Peach.Row.SetupTreeRootZones
        Manager DripIrrigator: same as Grape_Squire_2.Squire_2.Row.DripIrrigator
        Operations VineIrrigation
        Operations WinterRainfall
          2006-08-26  [Irrigation].Apply(45);
        Manager PlantVariables
          script: same as in Peach.Row.PlantVariables
        Manager HarvestNPrune: same as Kiwifruit.Row.HarvestNPrune
      RectangularZone Alley: Length=100; Width=1.5; Slope=0
        Report: EventNames=[Clock].DoReport
          VariableNames:
            [Clock].Today
            [Slurp].Leaf.Height as height
            [Slurp].Leaf.LAI as lai
            [AreaVariables].Script.FRadIntUnderstory as f.rad.int
            [AreaVariables].Script.TranspUnderstory as transpiration
            sum([Soil].SoilWater.SWmm[1:5]) as psw
            [Soil].OutputLayers.SW
            [Soil].SoilWater.Es as Evaporation
        SurfaceOrganicMatter: InitialResidueName=wheat_stubble; InitialResidueType=wheat; InitialResidueMass=500; InitialStandingFraction=0; InitialCPR=0; InitialCNR=100; FractionFaecesAdded=0.5
        Plant Slurp: CropType=Slurp; IsEnding=false; DaysAfterEnding=0
        Fertiliser
        Irrigation
        Manager PastureInitialisation
          CultivarName = StaticCrop
          InitialRootDepth = 2000
          SowingDate = 2006-07-01
          RootDepth = 2000
          RFV = 10
          KLReductionFactor = -0.001
          KLReductionDepth = 150
          YKLModifiers =
          XDepth =
          MaxG = 0.004
          R50 = 150
          script: same as in Peach.Alley.PastureInitialisation
        Manager SetPastureVariables: same as Grape_Squire_1.Squire_1.Alley.SetPastureVariables
        Manager SetupPastureRootZones: same as Grape_Squire_1.Squire_1.Alley.SetupPastureRootZones
        Manager PlantVariables
          script: same as in Peach.Row.PlantVariables
        Soil: Latitude=0; Longitude=0
          LayerStructure: Thickness=[200, 200, 200, 200, 200, 200, 400, 400, 400, 600]
          Analysis: same as Peach.Row.Soil.Analysis
          SoilWater: same as Peach.Row.Soil.SoilWater
          SoilNitrogen: same as Peach.Row.Soil.SoilNitrogen
          SoilOrganicMatter: same as Peach.Row.Soil.SoilOrganicMatter
          Sample Initial nitrogen: NO3Units=kg/ha; NH4Units=ppm; SWUnits=Volumetric; OCUnits=Total; PHUnits=Water
            Thickness  NO3  NH4
            100        217  0
            200        30   0
            300        5    0
            300        5    0
            300        0    0
            300        0    0
          CERESSoilTemperature
          OutputLayers: Thickness=[300, 300, 300]
          InitialWater: PercentMethod=1; FractionFull=0.79
          Water: same as Grape_Seaview.Seaview.Row.Soil.Water
        Operations WinterRainfall
          2006-08-26  [Irrigation].Apply(45);
  Simulation Grape_Seaview_08
    Clock: StartDate=2007-07-01; EndDate=2008-07-01
    Summary SummaryFile
    Weather: FileName=Site1003_SEA.met
    MicroClimate: a_interception=0; b_interception=1; c_interception=0; d_interception=0; soil_albedo=0.3; SoilHeatFluxFraction=0.4; NightInterceptionFraction=0.5; ReferenceHeight=2
    SoilArbitrator Soil Arbitrator
    RectangularZone Row: Length=100; Width=0.9; Slope=0
      Soil: Latitude=0; Longitude=0
        LayerStructure: Thickness=[200, 200, 200, 200, 200, 200, 400, 400, 400, 600]
        Analysis: same as Peach.Row.Soil.Analysis
        Water
          Thickness  BD    AirDry  LL15  DUL   SAT
          300        1.35  0.06    0.12  0.3   0.4
          300        1.4   0.1     0.12  0.3   0.4
          300        1.4   0.005   0.16  0.3   0.4
          300        1.4   0.05    0.05  0.28  0.35
          1950       1.5   0.06    0.06  0.15  0.3
          SoilCrop SimpleFruitTreeSoil: LL=[0.12, 0.12, 0.16, 0.05, 0.06]; KL=[0.12, 0.04, 0.03, 0.03, 0.02]; XF=[1, 1, 1, 1, 1]
          SoilCrop SlurpSoil: LL=[0.12, 0.12, 0.16, 0.05, 0.06]; KL=[0.11, 0.11, 0.11, 0.11, 0.11]; XF=[1, 1, 1, 1, 1]
        SoilWater: same as Grape_Squire_1.Squire_1.Row.Soil.SoilWater
        SoilNitrogen: same as Peach.Row.Soil.SoilNitrogen
        SoilOrganicMatter: same as Peach.Row.Soil.SoilOrganicMatter
        Sample Initial nitrogen: NO3Units=kg/ha; NH4Units=ppm; SWUnits=Volumetric; OCUnits=Total; PHUnits=Water
          Thickness  NO3  NH4
          100        217  0
          200        30   0
          300        5    0
          300        5    0
          300        0    0
          300        0    0
        CERESSoilTemperature
        OutputLayers: Thickness=[300, 300, 300]
        InitialWater: PercentMethod=1; FractionFull=1
      Report: same as Grape_Squire_2.Squire_2.Row.Report
      Report Drainage: EventNames=[Clock].DoReport
        VariableNames:
          [Clock].Today
          [Soil].SoilWater.SWmm
          [Soil].SoilWater.SWmm[6] + [Soil].SoilWater.SWmm[7] + [Soil].SoilWater.SWmm[8] + [Soil].SoilWater.SWmm[9] + [Soil].SoilWater.SWmm[10] as SW_belowRoots
      SurfaceOrganicMatter: InitialResidueName=wheat_stubble; InitialResidueType=wheat; InitialResidueMass=500; InitialStandingFraction=0; InitialCPR=0; InitialCNR=100; FractionFaecesAdded=0.5
      Plant SimpleFruitTree: CropType=Slurp; IsEnding=false; DaysAfterEnding=0
      Fertiliser
      Irrigation
      Manager TreeInitialisation
        CultivarName = Grape_4Cane
        SowingDate = 2007-07-01
        StartAge = 9
        KLReductionFactor = -0.0005
        KLReductionDepth = 150
        YKLModifiers =
        XDepth =
        MaxG = 0.005
        R50 = 100
        script: same as in Grape_Squire_1.Squire_1.Row.TreeInitialisation
      Manager SetupTreeRootZones: same as Peach.Row.SetupTreeRootZones
      Manager DripIrrigator: same as Grape_Squire_2.Squire_2.Row.DripIrrigator
      Operations VineIrrigation
        2007-11-09  [DripIrrigator].Script.applyDripIrri(2.19);
        2007-11-17  [DripIrrigator].Script.applyDripIrri(2.98);
        2007-11-19  [DripIrrigator].Script.applyDripIrri(0.21);
        2007-11-20  [DripIrrigator].Script.applyDripIrri(1.52);
        2007-11-22  [DripIrrigator].Script.applyDripIrri(3.04);
        2007-11-25  [DripIrrigator].Script.applyDripIrri(1.38);
        2007-11-27  [DripIrrigator].Script.applyDripIrri(1.77);
        2007-11-30  [DripIrrigator].Script.applyDripIrri(4.31);
        2007-12-02  [DripIrrigator].Script.applyDripIrri(2.99);
        2007-12-03  [DripIrrigator].Script.applyDripIrri(2.73);
        2007-12-04  [DripIrrigator].Script.applyDripIrri(3);
        2007-12-05  [DripIrrigator].Script.applyDripIrri(7.87);
        2007-12-06  [DripIrrigator].Script.applyDripIrri(7.62);
        2007-12-07  [DripIrrigator].Script.applyDripIrri(7.77);
        2007-12-08  [DripIrrigator].Script.applyDripIrri(7.6);
        2007-12-09  [DripIrrigator].Script.applyDripIrri(7.86);
        2007-12-10  [DripIrrigator].Script.applyDripIrri(6.07);
        2007-12-12  [DripIrrigator].Script.applyDripIrri(6.06);
        2007-12-13  [DripIrrigator].Script.applyDripIrri(5.42);
        2007-12-15  [DripIrrigator].Script.applyDripIrri(6.56);
        2007-12-16  [DripIrrigator].Script.applyDripIrri(6.54);
        2007-12-17  [DripIrrigator].Script.applyDripIrri(9);
        2007-12-18  [DripIrrigator].Script.applyDripIrri(6.12);
        2007-12-20  [DripIrrigator].Script.applyDripIrri(3.66);
        2007-12-21  [DripIrrigator].Script.applyDripIrri(5.75);
        2007-12-25  [DripIrrigator].Script.applyDripIrri(0.17);
        2007-12-27  [DripIrrigator].Script.applyDripIrri(6.25);
        2007-12-29  [DripIrrigator].Script.applyDripIrri(6.3);
        2008-01-02  [DripIrrigator].Script.applyDripIrri(0.18);
        2008-01-04  [DripIrrigator].Script.applyDripIrri(6.9);
        2008-01-05  [DripIrrigator].Script.applyDripIrri(8.06);
        2008-01-07  [DripIrrigator].Script.applyDripIrri(6.82);
        2008-01-09  [DripIrrigator].Script.applyDripIrri(7.95);
        2008-01-11  [DripIrrigator].Script.applyDripIrri(7.87);
        2008-01-13  [DripIrrigator].Script.applyDripIrri(9.68);
        2008-01-15  [DripIrrigator].Script.applyDripIrri(9.45);
        2008-01-17  [DripIrrigator].Script.applyDripIrri(9.48);
        2008-01-19  [DripIrrigator].Script.applyDripIrri(9.41);
        2008-01-21  [DripIrrigator].Script.applyDripIrri(9.48);
        2008-01-23  [DripIrrigator].Script.applyDripIrri(9.44);
        2008-01-25  [DripIrrigator].Script.applyDripIrri(2.95);
        2008-01-27  [DripIrrigator].Script.applyDripIrri(9.3);
        2008-01-29  [DripIrrigator].Script.applyDripIrri(9.56);
        2008-01-31  [DripIrrigator].Script.applyDripIrri(6.15);
        2008-02-02  [DripIrrigator].Script.applyDripIrri(8.68);
        2008-02-04  [DripIrrigator].Script.applyDripIrri(8.91);
        2008-02-06  [DripIrrigator].Script.applyDripIrri(9.06);
        2008-02-12  [DripIrrigator].Script.applyDripIrri(9.3);
        2008-02-14  [DripIrrigator].Script.applyDripIrri(9.39);
        2008-02-16  [DripIrrigator].Script.applyDripIrri(8.53);
        2008-02-18  [DripIrrigator].Script.applyDripIrri(8.44);
        2008-02-20  [DripIrrigator].Script.applyDripIrri(7.99);
        2008-02-22  [DripIrrigator].Script.applyDripIrri(6.68);
        2008-02-24  [DripIrrigator].Script.applyDripIrri(0.14);
        2008-02-26  [DripIrrigator].Script.applyDripIrri(6.06);
        2008-02-28  [DripIrrigator].Script.applyDripIrri(4.14);
        2008-03-01  [DripIrrigator].Script.applyDripIrri(7.52);
        2008-03-12  [DripIrrigator].Script.applyDripIrri(0.33);
        2008-03-17  [DripIrrigator].Script.applyDripIrri(8.12);
        2008-03-19  [DripIrrigator].Script.applyDripIrri(7.99);
        2008-03-21  [DripIrrigator].Script.applyDripIrri(7.98);
        2008-03-23  [DripIrrigator].Script.applyDripIrri(7.63);
        2008-03-25  [DripIrrigator].Script.applyDripIrri(7.98);
        2008-03-27  [DripIrrigator].Script.applyDripIrri(7.79);
        2008-03-29  [DripIrrigator].Script.applyDripIrri(8.25);
        2008-03-31  [DripIrrigator].Script.applyDripIrri(8.34);
        2008-04-02  [DripIrrigator].Script.applyDripIrri(8.1);
        2008-04-04  [DripIrrigator].Script.applyDripIrri(8.29);
        2008-04-10  [DripIrrigator].Script.applyDripIrri(3);
        2008-04-12  [DripIrrigator].Script.applyDripIrri(3.97);
        2008-04-14  [DripIrrigator].Script.applyDripIrri(4.99);
        2008-05-01  [DripIrrigator].Script.applyDripIrri(0.25);
      Operations WinterRainfall
        2004-06-24  [Irrigation].Apply(150);
      Manager PlantVariables
        script: same as in Peach.Row.PlantVariables
      Manager HarvestNPrune: same as Kiwifruit.Row.HarvestNPrune
    RectangularZone Alley: Length=100; Width=1.5; Slope=0
      Report: EventNames=[Clock].DoReport
        VariableNames:
          [Clock].Today
          [Slurp].Leaf.Height as height
          [Slurp].Leaf.LAI as lai
          [AreaVariables].Script.FRadIntUnderstory as f.rad.int
          [AreaVariables].Script.TranspUnderstory as transpiration
          sum([Soil].SoilWater.SWmm[1:5]) as psw
          [Soil].OutputLayers.SW
          [Soil].SoilWater.Es as Evaporation
      Report Drainage: EventNames=[Clock].DoReport
        VariableNames:
          [Clock].Today
          [Soil].SoilWater.SWmm[6] + [Soil].SoilWater.SWmm[7] + [Soil].SoilWater.SWmm[8] + [Soil].SoilWater.SWmm[9] + [Soil].SoilWater.SWmm[10] as SW_belowRoots
      SurfaceOrganicMatter: InitialResidueName=wheat_stubble; InitialResidueType=wheat; InitialResidueMass=500; InitialStandingFraction=0; InitialCPR=0; InitialCNR=100; FractionFaecesAdded=0.5
      Plant Slurp: CropType=Slurp; IsEnding=false; DaysAfterEnding=0
      Fertiliser
      Irrigation
      Manager PastureInitialisation: same as Peach.Alley.PastureInitialisation
      Manager SetPastureVariables: same as Grape_Squire_1.Squire_1.Alley.SetPastureVariables
      Manager SetupPastureRootZones: same as Grape_Squire_1.Squire_1.Alley.SetupPastureRootZones
      Operations WinterRainfall
        2004-06-24  [Irrigation].Apply(150);
      Soil: Latitude=0; Longitude=0
        LayerStructure: Thickness=[200, 200, 200, 200, 200, 200, 400, 400, 400, 600]
        Analysis: same as Peach.Row.Soil.Analysis
        SoilWater: same as Grape_Squire_1.Squire_1.Row.Soil.SoilWater
        SoilNitrogen: same as Peach.Row.Soil.SoilNitrogen
        SoilOrganicMatter: same as Peach.Row.Soil.SoilOrganicMatter
        Sample Initial nitrogen: NO3Units=kg/ha; NH4Units=ppm; SWUnits=Volumetric; OCUnits=Total; PHUnits=Water
          Thickness  NO3  NH4
          100        217  0
          200        30   0
          300        5    0
          300        5    0
          300        0    0
          300        0    0
        CERESSoilTemperature
        OutputLayers: Thickness=[300, 300, 300]
        InitialWater: PercentMethod=1; FractionFull=1
        Water: same as Grape_Seaview_08.Row.Soil.Water
      Manager PlantVariables
        script: same as in Peach.Row.PlantVariables
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