Simulations: Version=14
  Replacements
    Plant Wheat: CropType=Wheat
      Memo TitlePage
        # The APSIM Wheat Model

        _Brown, H.E., Huth, N.I. and Holzworth, D.P._

        The APSIM wheat model has been developed using the Plant Modelling Framework (PMF) of [brown_plant_2014]. This new framework provides a library of plant organ and process submodels that can be coupled, at runtime, to construct a model in much the same way that models can be coupled to construct a simulation. This means that dynamic composition of lower level process and organ classes (e.g. photosynthesis, leaf) into larger constructions (e.g. maize, wheat, sorghum) can be achieved by the model developer without additional coding.

        The model consists of:

        * a phenology model to simulate development between growth phases
        * a structure model to simulate plant morphology
        * a collection of organs to simulate the various plant parts
        * an arbitrator to allocate resources (N, biomass) to the various plant organs
      OrganArbitrator Arbitrator
        RelativeAllocation NArbitrator
        RelativeAllocation DMArbitrator
      Phenology: DaysAfterSowing=0
        DivideFunction MeanTemp
          AddFunction
            VariableReference MaxT: VariableName=[Weather].MaxT
            VariableReference MinT: VariableName=[Weather].MinT
          Constant Two: FixedValue=2
        AddFunction ThermalTime
          AirTemperatureFunction ThermalTime
            XYPairs: X=[0, 26, 37]; Y=[0, 26, 0]
            Memo
              Thermal time determines the rate of developmental progress through many of the crops phases and is used by organs to determing potential growth rates.
          PhaseLookup SoilTemperatureCorrection
            PhaseLookupValue ApexBelowGround: Start=Germination; End=TerminalSpikelet
              MultiplyFunction NetDailyRadiativeHeating
                LinearInterpolationFunction DaylengthRadiationFactor: XProperty=[Phenology].Photoperiod.Value()
                  XYPairs: X=[4, 12, 20]; Y=[0, 0, 0]
                LinearInterpolationFunction CanopyInsulationEffect: XProperty=[Leaf].RadIntTot
                  XYPairs: X=[0, 1]; Y=[1, 0.3]
        MovingAverageFunction MeanThermalTime: NumberOfDays=10; InitialValue=15
          VariableReference ThermalTime: VariableName=[Phenology].ThermalTime.Value()
        MultiplyFunction DailyVernalisation
          VariableReference DeltaHaunStage: VariableName=[Structure].DeltaHaunStage
          AirTemperatureFunction TempResponseProfile
            Memo
              Thermal time determines the rate of developmental progress through many of the crops phases and is used by organs to determing potential growth rates.
            XYPairs
              X=[0, 1, 2, 3, 4, 5, 6, 7, 8, 9, 10, 11, 12, 13, 14, 15, 16, 17, 18, 19, 20, 30, 32]
              Y=[0, 1.20499, 1.03715, 0.892679, 0.768336, 0.661313, 0.569198, 0.489913, 0.421672, 0.362936, 0.312382, 0.26887, 0.231418, 0.1991837, 0.171439, 0.147559, 0.127005, 0.109314, 0.0940877, 0.080982, 0, 0, -0.5]
        PhotoperiodFunction Photoperiod: Twilight=-6; DayLength=0
        PhaseLookup PercievedPhotoPeriod
          PhaseLookupValue ApexBelowGround: Start=Germination; End=Emergence
            Constant: FixedValue=0; Units=h
          PhaseLookupValue ApexAboveGround: Start=Emergence; End=HarvestRipe
            VariableReference Photoperiod: VariableName=[Phenology].Photoperiod.Value()
        MinimumFunction Vrn1
          Constant Saturation: FixedValue=1; Units=Relative Experssion
          AccumulateFunction CurrentExpression: StartStageName=Germination; EndStageName=TerminalSpikelet; FractionRemovedOnCut=0; FractionRemovedOnHarvest=0; FractionRemovedOnGraze=0; FractionRemovedOnPrune=0
            LessThanFunction Vernalisation
              VariableReference If_Vrn4: VariableName=[Phenology].Vrn4.Value()
              VariableReference IsLessThanLag: VariableName=[Phenology].VernLag.Value()
              Constant Return_Zero: FixedValue=0
              VariableReference elseReturn_Vernalisation: VariableName=[Phenology].DailyVernalisation.Value()
        MinimumFunction Vrn4
          VariableReference MaxExpression: VariableName=[Phenology].VernLag.Value()
          AccumulateFunction CurrentExpression: StartStageName=Germination; EndStageName=TerminalSpikelet; FractionRemovedOnCut=0; FractionRemovedOnHarvest=0; FractionRemovedOnGraze=0; FractionRemovedOnPrune=0
            VariableReference VernalisationConditioning: VariableName=[Phenology].DailyVernalisation.Value()
        GerminatingPhase Germinating: Start=Sowing; End=Germination
        EmergingPhase Emerging: Start=Germination; End=Emergence; ShootLag=40; ShootRate=1.5
          VariableReference ThermalTime: VariableName=[Phenology].ThermalTime.Value()
        GenericPhase Vegetative: Start=Emergence; End=TerminalSpikelet
          VariableReference ThermalTime: VariableName=[Phenology].ThermalTime.Value()
          MultiplyFunction Target
            VariableReference Phyllochron: VariableName=[Structure].MeanPhyllochron.Value()
            VariableReference HSTS: VariableName=[Structure].HaunStageTerminalSpikelet.Value()
        LeafAppearancePhase StemElongation: Start=TerminalSpikelet; End=FlagLeaf
          VariableReference ThermalTime: VariableName=[Phenology].ThermalTime.Value()
        GenericPhase EarlyReproductive: Start=FlagLeaf; End=Flowering
          VariableReference ThermalTime: VariableName=[Phenology].ThermalTime.Value()
          MultiplyFunction Target
            VariableReference Phyllochron: VariableName=[Structure].Phyllochron.BasePhyllochron.Value()
            AddFunction Phyllochrons
              VariableReference LongDayBase: VariableName=[Phenology].EarlyReproductiveLongDayBase.Value()
              MultiplyFunction IncreaseDueToShortPhotoPeriod
                LinearInterpolationFunction PhotoPeriodResponse: XProperty=[Phenology].Photoperiod.Value()
                  XYPairs: X=[11, 16]; Y=[1, 0]
                VariableReference PpSensitivity: VariableName=[Phenology].EarlyReproductivePpSensitivity.Value()
        GenericPhase GrainDevelopment: Start=Flowering; End=StartGrainFill
          Constant Target: FixedValue=120
          VariableReference ThermalTime: VariableName=[Phenology].ThermalTime.Value()
        GenericPhase GrainFilling: Start=StartGrainFill; End=EndGrainFill
          Constant Target: FixedValue=545
          VariableReference ThermalTime: VariableName=[Phenology].ThermalTime.Value()
        GenericPhase Maturing: Start=EndGrainFill; End=Maturity
          Constant Target: FixedValue=35
          VariableReference ThermalTime: VariableName=[Phenology].ThermalTime.Value()
        GenericPhase Ripening: Start=Maturity; End=HarvestRipe
          Constant Target: FixedValue=300
          VariableReference ThermalTime: VariableName=[Phenology].ThermalTime.Value()
        EndPhase ReadyForHarvesting: Start=HarvestRipe; End=Unused
          VariableReference ThermalTime: VariableName=[Phenology].ThermalTime.Value()
        ZadokPMF Zadok
        OnEventFunction FlagLeafDAS: SetEvent=FlagLeaf; ReSetEvent=never
          Memo
            A function is used to provide flowering date as days after sowing(DAS).
          Constant PreEventValue: FixedValue=0
          VariableReference PostEventValue: VariableName=[Phenology].DaysAfterSowing
        OnEventFunction FloweringDAS: SetEvent=Flowering; ReSetEvent=never
          Memo
            A function is used to provide flowering date as days after sowing(DAS).
          Constant PreEventValue: FixedValue=0
          VariableReference PostEventValue: VariableName=[Phenology].DaysAfterSowing
        OnEventFunction MaturityDAS: SetEvent=Maturity; ReSetEvent=never
          Memo
            A function is used to provide maturity date as days after sowing(DAS).
          Constant PreEventValue: FixedValue=0
          VariableReference PostEventValue: VariableName=[Phenology].DaysAfterSowing
        Constant MinimumLeafNumber: FixedValue=7; Units=Leaves
          Memo
            Number of leaves the plant will produce when fully vernalised early and grown in long photoperiod
        Constant VrnSensitivity: FixedValue=0; Units=Leaves
          Memo
            The difference between Inherent earlyness leaf number and the number of leaves produced when the plant is unvernalisaed and grown in long photoperiod
        Constant PpSensitivity: FixedValue=3; Units=Leaves
          Memo
            The reduction in leaf number going from 8 to 16 h Pp
        Constant VernLag: FixedValue=1; Units=Unitless
          Memo
            The amount of vernalising temperature required before vernalisation response will be evident.  Value of relative to the amount offl vernalisation temperature required from the end of the lag until vernalisation saturation.  A value of 0 means there is no lag, a value of 1 means the lag is the same (in vernal time) as the vernalisation requirement and a value of 2 means the lag is twice as long as the vernalisation response phase
        Constant EarlyReproductivePpSensitivity: FixedValue=0
          Memo
            The phyllochrons duration for the plant to go from flag leaf ligual appearance at 16 h Pp compared to the phyllochron duration for the same phase at 8 h Pp.
        Constant EarlyReproductiveLongDayBase: FixedValue=2.5
          Memo
            The phyllochrons duration for the plant to go from flag leaf ligual appearance at 16 h Pp.
      Structure: Initialised=false; Germinated=false; Emerged=false; CohortToInitialise=0; TipToAppear=0; ApexNum=0
        VariableReference ThermalTime: VariableName=[Phenology].ThermalTime.Value()
        MultiplyFunction Phyllochron
          LinearInterpolationFunction LeafStageFactor: XProperty=[Leaf].AppearedCohortNo
            XYPairs: X=[0, 2, 3, 7, 8, 11, 12]; Y=[0.75, 0.75, 1, 1, 1.4, 1.4, 1.4]
          Constant BasePhyllochron: FixedValue=120
          Memo Rational
            Based on [Jamieson_SIRIUS_1998] where leaf appearace could be described by a base phyllochron determined between leaves 2 and 7 and a phyllochron that was 70% of base phyllochron for leaves < 2 and 130% of base phyllochron for leaves > 7
          LinearInterpolationFunction PhotoPeriodEffect: XProperty=[Phenology].Photoperiod.Value()
            XYPairs: X=[8, 12, 14]; Y=[1.6, 1, 1]
        MultiplyFunction BranchingRate
          PhaseLookup PotentialBranchingRate
            PhaseLookupValue Vegetative: Start=Emergence; End=TerminalSpikelet
              LinearInterpolationFunction PotentialBranchingRate: XProperty=[Structure].LeafTipsAppeared
                XYPairs: X=[1, 2, 3, 4, 5, 6, 7, 8]; Y=[0, 0, 1, 2, 4, 7, 12, 20]
            PhaseLookupValue Reproductive: Start=TerminalSpikelet; End=HarvestRipe
              Constant Zero: FixedValue=0
          MinimumFunction StressFactors
            LinearInterpolationFunction WSC: XProperty=[Stem].PercentWSC.Value()
              XYPairs: X=[0.2, 0.27]; Y=[1, 1]
            LinearInterpolationFunction Nitrogen: XProperty=[Arbitrator].FN
              XYPairs: X=[0.5, 2, 3]; Y=[0, 1, 1]
            LinearInterpolationFunction Cover: XProperty=[Leaf].CoverTotal
              XYPairs: X=[0, 0.1, 0.25]; Y=[1, 1, 0]
            LinearInterpolationFunction Growth: XProperty=[Structure].MeanTillerGrowthRate.Value()
              XYPairs: X=[0, 0.001, 0.005]; Y=[1, 1, 1]
            LinearInterpolationFunction PhotoPeriodEffect: XProperty=[Phenology].Photoperiod.Value()
              XYPairs: X=[11.99, 12, 14]; Y=[1, 1, 1]
            LinearInterpolationFunction TemperatuerEffect: XProperty=[Phenology].MeanTemp.Value()
              XYPairs: X=[4, 10, 14]; Y=[1, 1, 1]
        PhaseLookup BranchMortality
          PhaseLookupValue MortalityPhase: Start=FlagLeaf; End=Flowering
            MultiplyFunction Mortality
              LinearInterpolationFunction MortalityPerDegDay: XProperty=[Structure].MeanTillerGrowthRate.Value()
                XYPairs: X=[0, 0.005, 0.005]; Y=[0.002, 0, 0]
              VariableReference ThermalTime: VariableName=[Phenology].ThermalTime.Value()
        HeightFunction HeightModel
          LinearInterpolationFunction PotentialHeight: XProperty=[Phenology].Stage
            XYPairs: X=[3, 4, 5, 6, 7]; Y=[10, 200, 1000, 1100, 1200]
          LinearInterpolationFunction WaterStress: XProperty=[Wheat].WaterSupplyDemandRatio
            XYPairs: X=[0.3, 1]; Y=[0, 1]
        MovingAverageFunction MeanTillerGrowthRate: NumberOfDays=5; InitialValue=0
          DivideFunction TillerGrowthRate
            VariableReference DailyGrowth: VariableName=[Arbitrator].DM.TotalFixationSupply
            VariableReference ThermalTime: VariableName=[Phenology].ThermalTime.Value()
            VariableReference StemPopulation: VariableName=[Structure].TotalStemPopn
        MovingAverageFunction MeanPhyllochron: NumberOfDays=300; InitialValue=80
          VariableReference Phyllochron: VariableName=[Structure].Phyllochron.Value()
        HoldFunction FinalLeafNumber: WhenToHold=TerminalSpikelet
          AddFunction ValueToHold
            VariableReference MineafNumber: VariableName=[Phenology].MinimumLeafNumber.Value()
            MultiplyFunction VernalLeaves
              VariableReference UnVernalisedLeaves: VariableName=[Phenology].VrnSensitivity.Value()
              SubtractFunction VernalisationReductionFactor
                Constant One: FixedValue=1
                VariableReference RelativeVrn1Expression: VariableName=[Phenology].Vrn1.Value()
            MultiplyFunction PhotoPLeaves
              VariableReference ShortPpLeaves: VariableName=[Phenology].PpSensitivity.Value()
              LinearInterpolationFunction PhotoPeriodReductionFactor: XProperty=[Phenology].Photoperiod.Value()
                XYPairs: X=[10, 16]; Y=[1, 0]
        DivideFunction HaunStageTerminalSpikelet
          SubtractFunction FLNlessIntercept
            VariableReference FinalLeafNumber: VariableName=[Structure].FinalLeafNumber.Value()
            Constant Intercept: FixedValue=2.85
          Constant Slope: FixedValue=1.1
        AddFunction HaunStage
          VariableReference AppearedLeaves: VariableName=[Leaf].ExpandedCohortNo
          VariableReference ProportionOfExpandingLeaf: VariableName=[Leaf].NextExpandingLeafProportion
        Constant StemSenescenceAge: FixedValue=0
      ReproductiveOrgan Grain: GrowthRespiration=0; MaintenanceRespiration=0; RipeStage=Ripe
        Biomass Live
        Biomass Dead
        Constant MaxNConcDailyGrowth: FixedValue=0.03
        Constant WaterContent: FixedValue=0.12
        Constant MinimumNConc: FixedValue=0.006
        Constant MaximumNConc: FixedValue=0.03
        Constant MaximumPotentialGrainSize: FixedValue=0.043; Units=g
        PhaseBasedSwitch NitrogenDemandSwitch: Start=Germination; End=Maturity
        AccumulateFunction AccumThermalTime: StartStageName=Flowering; EndStageName=Maturity; FractionRemovedOnCut=0; FractionRemovedOnHarvest=0; FractionRemovedOnGraze=0; FractionRemovedOnPrune=0
          VariableReference DailyThermalTimeValue: VariableName=[Phenology].ThermalTime.Value()
        AirTemperatureFunction FillingRate
          XYPairs: X=[0, 26, 30, 35]; Y=[0, 0.0015, 0.0015, 0.0015]
        PhaseLookup DMDemandFunction
          PhaseLookupValue InitialPhase: Start=Flowering; End=StartGrainFill
            FillingRateFunction
              VariableReference NumberFunction: VariableName=[Grain].NumberFunction.Value()
              VariableReference FillingDuration: VariableName=[Phenology].GrainDevelopment.Target.Value()
              VariableReference ThermalTime: VariableName=[Phenology].ThermalTime.Value()
              MultiplyFunction PotentialSizeIncrement
                VariableReference InitialProportion: VariableName=[Grain].InitialGrainProportion.Value()
                VariableReference MaximumSize: VariableName=[Grain].MaximumPotentialGrainSize.Value()
          PhaseLookupValue LinearPhase: Start=StartGrainFill; End=EndGrainFill
            FillingRateFunction
              VariableReference NumberFunction: VariableName=[Grain].NumberFunction.Value()
              VariableReference FillingDuration: VariableName=[Phenology].GrainFilling.Target.Value()
              VariableReference ThermalTime: VariableName=[Phenology].ThermalTime.Value()
              MultiplyFunction PotentialSizeIncrement
                SubtractFunction ProportionLinearPhase
                  Constant One: FixedValue=1
                  VariableReference InitialProportion: VariableName=[Grain].InitialGrainProportion.Value()
                VariableReference MaximumSize: VariableName=[Grain].MaximumPotentialGrainSize.Value()
        ExpressionFunction Protein
          Expression=([Grain].Live.N + [Grain].Dead.N)/([Grain].Live.Wt + [Grain].Dead.Wt) * 100 * 5.71
        DivideFunction GrowthRateGrainDevelopment
          AccumulateFunction GrowthGrainDevelopment: StartStageName=FlagLeaf; EndStageName=StartGrainFill; FractionRemovedOnCut=0; FractionRemovedOnHarvest=0; FractionRemovedOnGraze=0; FractionRemovedOnPrune=0
            VariableReference DailyBiomassProduction: VariableName=[Arbitrator].DM.TotalFixationSupply
          AccumulateFunction DaysGrainDevelopment: StartStageName=FlagLeaf; EndStageName=StartGrainFill; FractionRemovedOnCut=0; FractionRemovedOnHarvest=0; FractionRemovedOnGraze=0; FractionRemovedOnPrune=0
            Constant LenthOfADay: FixedValue=1; Units=days/day
        Constant InitialGrainProportion: FixedValue=0.05
        PhaseLookup NFillingRate
          PhaseLookupValue GrainFilling: Start=Flowering; End=EndGrainFill
            FillingRateFunction
              VariableReference NumberFunction: VariableName=[Grain].NumberFunction.Value()
              AddFunction FillingDuration
                VariableReference FloweringToGrainFilling: VariableName=[Phenology].GrainDevelopment.Target.Value()
                VariableReference GrainFilling: VariableName=[Phenology].GrainFilling.Target.Value()
              VariableReference ThermalTime: VariableName=[Phenology].ThermalTime.Value()
              MultiplyFunction PotentialSizeIncrement
                Constant MaximumFinalNConc: FixedValue=0.026; Units=g/g
                VariableReference MaximumSize: VariableName=[Grain].MaximumPotentialGrainSize.Value()
        HoldFunction NumberFunction: WhenToHold=Flowering
          MultiplyFunction ValueToHold
            Constant GrainsPerGramOfStem: FixedValue=22; Units=grains
            VariableReference StemMass: VariableName=[StemPlusSpike].Wt
              VariableReference StemMass: VariableName=[StemPlusSpike].Wt
        BiomassRemoval BiomassRemovalDefaults
          OrganBiomassRemovalType Harvest: FractionLiveToRemove=1; FractionDeadToRemove=0; FractionLiveToResidue=0; FractionDeadToResidue=0
          OrganBiomassRemovalType Cut: FractionLiveToRemove=1; FractionDeadToRemove=0; FractionLiveToResidue=0; FractionDeadToResidue=0
          OrganBiomassRemovalType Prune: FractionLiveToRemove=0; FractionDeadToRemove=0; FractionLiveToResidue=0.8; FractionDeadToResidue=0
          OrganBiomassRemovalType Graze: FractionLiveToRemove=0.6; FractionDeadToRemove=0; FractionLiveToResidue=0.2; FractionDeadToResidue=0
          OrganBiomassRemovalType Thin: FractionLiveToRemove=0; FractionDeadToRemove=0; FractionLiveToResidue=0.05; FractionDeadToResidue=0
      Root: GrowthRespiration=0; MaintenanceRespiration=0
        CompositeBiomass Live: Propertys=[[Root].LayerLive]
        CompositeBiomass Dead: Propertys=[[Root].LayerDead]
        LinearInterpolationFunction KLModifier: XProperty=[Leaf].LAI
          XYPairs: X=[0, 3]; Y=[1, 1]
        Constant SoilWaterEffect: FixedValue=1
        Constant MaxDailyNUptake: FixedValue=20
        Constant SenescenceRate: FixedValue=0.005
        Constant StructuralFraction: FixedValue=1
        Constant MaximumRootDepth: FixedValue=2000
        Constant MaximumNConc: FixedValue=0.01
        Constant MinimumNConc: FixedValue=0.01
        PhaseLookup RootFrontVelocity
          PhaseLookupValue PreEmergence: Start=Germination; End=Emergence
            Constant Value: FixedValue=5
          PhaseLookupValue PostEmergence: Start=Emergence; End=Maturity
            Constant Value: FixedValue=20
        PhaseBasedSwitch NitrogenDemandSwitch: Start=Germination; End=Maturity
        BiomassRemoval BiomassRemovalDefaults
          OrganBiomassRemovalType Harvest: FractionLiveToRemove=0; FractionDeadToRemove=0; FractionLiveToResidue=0.2; FractionDeadToResidue=0
          OrganBiomassRemovalType Cut: FractionLiveToRemove=0; FractionDeadToRemove=0; FractionLiveToResidue=0.3; FractionDeadToResidue=0
          OrganBiomassRemovalType Prune: FractionLiveToRemove=0; FractionDeadToRemove=0; FractionLiveToResidue=0.1; FractionDeadToResidue=0
          OrganBiomassRemovalType Graze: FractionLiveToRemove=0; FractionDeadToRemove=0; FractionLiveToResidue=0.15; FractionDeadToResidue=0
          OrganBiomassRemovalType Thin: FractionLiveToRemove=0; FractionDeadToRemove=0; FractionLiveToResidue=0.05; FractionDeadToResidue=0
        LinearInterpolationFunction KNO3: XProperty=[Root].LengthDensity
          XYPairs: X=[0, 0.004]; Y=[0.002, 0.02]
        LinearInterpolationFunction KNH4: XProperty=[Root].LengthDensity
          XYPairs: X=[0, 0.004]; Y=[0.001, 0.01]
        LinearInterpolationFunction NUptakeSWFactor: XProperty=[Root].RWC
          XYPairs: X=[0, 0.2, 1]; Y=[1, 1, 1]
        Constant InitialDM: FixedValue=0.2; Units=g/plant
        Constant SpecificRootLength: FixedValue=40; Units=m/g
        PartitionFractionDemandFunction DMDemandFunction
          PhaseLookup PartitionFraction
            PhaseLookupValue PreEmergence: Start=Germination; End=Emergence
              Constant Value: FixedValue=0
            PhaseLookupValue PreFlowering: Start=Emergence; End=Flowering
              Constant Value: FixedValue=0.2
            PhaseLookupValue PostFlowering: Start=Emergence; End=Flowering
              Constant Value: FixedValue=0
      Leaf: MaxCover=1; Albedo=0.2; Gsmax=0.015; R50=150; MicroClimatePresent=true; KDead=0.3; MaximumMainStemLeafNumber=30
        zero: GrowthRespiration, MaintenanceRespiration, CurrentExpandingLeaf, StartFractionExpanded, FractionNextleafExpanded, DeadNodesYesterday, FRGR, PotentialEP, DMConversionEfficiency, TipsAtEmergence, CohortsAtInitialisation, FractionDied
        LeafCohort InitialLeaves[1]: Rank=1; Area=200
          zero: NReallocationFactor, DMReallocationFactor, NRetranslocationFactor, DMRetranslocationFactor, ShadeInducedSenRate, SenescedFrac, DeltaPotentialArea, DeltaWaterConstrainedArea, DeltaCarbonConstrainedArea, PotentialStructuralDMAllocation, PotentialMetabolicDMAllocation, MetabolicNReallocated, MetabolicWtReallocated, StorageNReallocated, StorageWtReallocated, MetabolicNRetranslocated, StorageNRetrasnlocated, DMRetranslocated, MetabolicNAllocation, StructuralDMAllocation, MetabolicDMAllocation, MaintenanceRespiration
        LeafCohort InitialLeaves[2]: Rank=2
          zero: NReallocationFactor, DMReallocationFactor, NRetranslocationFactor, DMRetranslocationFactor, ShadeInducedSenRate, SenescedFrac, DeltaPotentialArea, DeltaWaterConstrainedArea, DeltaCarbonConstrainedArea, PotentialStructuralDMAllocation, PotentialMetabolicDMAllocation, MetabolicNReallocated, MetabolicWtReallocated, StorageNReallocated, StorageWtReallocated, MetabolicNRetranslocated, StorageNRetrasnlocated, DMRetranslocated, MetabolicNAllocation, StructuralDMAllocation, MetabolicDMAllocation, Area, MaintenanceRespiration
        CompositeBiomass Live: Propertys=[[Leaf].CohortLive]
        CompositeBiomass Dead: Propertys=[[Leaf].CohortDead]
        ArrayBiomass CohortArrayLive: Propertys=[[Leaf].Live]; ArraySize=[Leaf].MaxNodeNo
        ArrayBiomass CohortArrayDead: Propertys=[[Leaf].Dead]; ArraySize=[Leaf].MaxNodeNo
        LeafCohortParameters CohortParameters
          Constant NReallocationFactor: FixedValue=1
          Constant NRetranslocationFactor: FixedValue=0.03
          Constant DMReallocationFactor: FixedValue=0
          Constant DMRetranslocationFactor: FixedValue=0
          MinimumFunction CellDivisionStress
            LinearInterpolationFunction WaterStressFactor: XProperty=[Wheat].WaterSupplyDemandRatio
              XYPairs: X=[0.5, 1]; Y=[0.1, 1]
            LinearInterpolationFunction NitrogenStressFactor: XProperty=[Wheat].Leaf.Fn
              XYPairs: X=[0, 0.5, 1]; Y=[0.1, 0.1, 1]
          MinimumFunction ExpansionStress
            LinearInterpolationFunction WaterStress: XProperty=[Wheat].WaterSupplyDemandRatio
              XYPairs: X=[0.1, 1.1, 1.3]; Y=[0, 1, 1]
            LinearInterpolationFunction TemperatuerEffect: XProperty=[Phenology].MeanTemp.Value()
              XYPairs: X=[0, 12, 14]; Y=[0, 1, 1]
          MultiplyFunction MaxArea
            Constant AreaLargestLeaves: FixedValue=2600; Units=mm^2
            LinearInterpolationFunction AgeFactor: XProperty=[Phenology].Stage
              XYPairs: X=[3, 3.45, 3.9, 4, 5]; Y=[0.1, 0.2, 0.3, 0.5, 1]
          MultiplyFunction GrowthDuration
            Constant Multiplier: FixedValue=1.3
            VariableReference Phyllochron: VariableName=[Structure].Phyllochron.Value()
          PhaseLookup LagDuration
            PhaseLookupValue VegetativeGrowth: Start=Emergence; End=TerminalSpikelet
              MultiplyFunction LagDuration
                VariableReference Phyllochron: VariableName=[Structure].Phyllochron.Value()
                LinearInterpolationFunction AgeFactor: XProperty=[Phenology].Stage
                  XYPairs: X=[3, 4]; Y=[5, 7]
                Constant Multiplier: FixedValue=1
            PhaseLookupValue StemElongation: Start=TerminalSpikelet; End=FlagLeaf
              SubtractFunction LagDuration
                AddFunction ThermalTimeToRipe
                  VariableReference EarlyReproductive: VariableName=[Phenology].EarlyReproductive.Target.Value()
                  VariableReference GrainDevelopment: VariableName=[Phenology].GrainDevelopment.Target.Value()
                  VariableReference GrainFilling: VariableName=[Phenology].GrainFilling.Target.Value()
                  VariableReference Maturing: VariableName=[Phenology].Maturing.Target.Value()
                  VariableReference Ripening: VariableName=[Phenology].Ripening.Target.Value()
                VariableReference SenescenceDuration: VariableName=[Leaf].CohortParameters.SenescenceDuration.Value()
          AddFunction LagDurationX
            MultiplyFunction ShortestDuration
              Constant Multiplier: FixedValue=2
              VariableReference Phyllochron: VariableName=[Structure].Phyllochron.Value()
            MultiplyFunction
              LinearInterpolationFunction AgeFactor: XProperty=[Phenology].Stage
                XYPairs: X=[3, 5]; Y=[0, 1]
              ExpressionFunction LongestDuration
                Expression=[Phenology].EarlyReproductive.Target.Value()+[Phenology].GrainDevelopment.Target.Value() + [Phenology].GrainFilling.Target.Value() +200
          MultiplyFunction SenescenceDuration
            Constant Multiplier: FixedValue=3
            VariableReference Phyllochron: VariableName=[Structure].Phyllochron.Value()
          Constant DetachmentLagDuration: FixedValue=1000000
          Constant DetachmentDuration: FixedValue=1000000
          Constant RelativeBranchLeafSize: FixedValue=1
          LinearInterpolationFunction MaximumNConc: XProperty=[Phenology].Stage
            XYPairs: X=[3, 4, 6]; Y=[0.08, 0.05, 0.02]
          LinearInterpolationFunction CriticalNConc: XProperty=[Phenology].Stage
            XYPairs: X=[3, 4, 6]; Y=[0.07, 0.04, 0.015]
          LinearInterpolationFunction MinimumNConc: XProperty=[Phenology].Stage
            XYPairs: X=[3, 4]; Y=[0.01, 0.005]
          AddFunction DroughtInducedLagAcceleration
            Constant One: FixedValue=1
            MultiplyFunction Stress
              Constant StressResponseCoefficient: FixedValue=1
              LinearInterpolationFunction StressFactor: XProperty=[Wheat].WaterSupplyDemandRatio
                XYPairs: X=[0, 0.25, 0.5]; Y=[1, 0.2, 0]
          AddFunction DroughtInducedSenAcceleration: same as Replacements.Wheat.Leaf.CohortParameters.DroughtInducedLagAcceleration
          LinearInterpolationFunction SpecificLeafAreaMax: XProperty=[Phenology].Stage
            XYPairs: X=[3, 4]; Y=[18000, 30000]
          LinearInterpolationFunction SpecificLeafAreaMin: XProperty=[Leaf].Fn
            XYPairs: X=[0.4, 1]; Y=[10000, 18000]
          Constant InitialNConc: FixedValue=0
          Constant StructuralFraction: FixedValue=0.5
          Constant StorageFraction: FixedValue=0
          Constant LeafSizeShapeParameter: FixedValue=0.3
          Constant SenessingLeafRelativeSize: FixedValue=1; Units=0-1
          MultiplyFunction ShadeInducedSenescenceRate
            LinearInterpolationFunction RatePerDegDay: XProperty=[Leaf].CohortCurrentRankCoverAbove
              XYPairs: X=[0.99, 1]; Y=[0, 0]
              Memo
                1% per degree day means it takes one phyllochron for a shaded leaf to fully sceness
            VariableReference ThermalTime: VariableName=[Phenology].ThermalTime.Value()
          Constant MaintenanceRespirationFunction: FixedValue=0
          ArrayFunction LagDurationAgeMultiplier: Values=0.5 0.75 1
          ArrayFunction SenescenceDurationAgeMultiplier: Values=0.5 0.75 1
          ArrayFunction LeafSizeAgeMultiplier: Values=0.5 0.75 1 1 1 1 1 1 1 1 1 1
        RUEModel Photosynthesis
          Constant RUE: FixedValue=1.5
          WeightedTemperatureFunction FT: MaximumTemperatureWeighting=0.75
            XYPairs: X=[0, 15, 25, 35]; Y=[0, 1, 1, 0]
          LinearInterpolationFunction FVPD: XProperty=[Leaf].Photosynthesis.VPD
            XYPairs: X=[0, 10, 50]; Y=[1, 1, 1]
          LinearInterpolationFunction FN: XProperty=[Leaf].Fn
            XYPairs: X=[0, 1]; Y=[0, 1]
          LinearInterpolationFunction FW: XProperty=[Leaf].Fw
            XYPairs: X=[0, 1]; Y=[0, 1]
          RUECO2Function FCO2: PhotosyntheticPathway=C3
          VariableReference RadnInt: VariableName=[Leaf].RadIntTot
        LinearInterpolationFunction FrostFraction: XProperty=[Weather].MinT
          XYPairs: X=[-1, 0]; Y=[0, 0]
        VariableReference ThermalTime: VariableName=[Phenology].ThermalTime.Value()
        MinimumFunction FRGRFunction
          VariableReference RUE_FT: VariableName=[Leaf].Photosynthesis.FT.Value()
          MinimumFunction Others
            VariableReference RUE_FN: VariableName=[Leaf].Photosynthesis.FN.Value()
            VariableReference RUE_FVPD: VariableName=[Leaf].Photosynthesis.FVPD.Value()
        BiomassRemoval BiomassRemovalDefaults
          OrganBiomassRemovalType Harvest: FractionLiveToRemove=0; FractionDeadToRemove=0; FractionLiveToResidue=0.3; FractionDeadToResidue=0.3
          OrganBiomassRemovalType Cut: FractionLiveToRemove=0.8; FractionDeadToRemove=0.8; FractionLiveToResidue=0; FractionDeadToResidue=0
          OrganBiomassRemovalType Prune: FractionLiveToRemove=0; FractionDeadToRemove=0; FractionLiveToResidue=0.6; FractionDeadToResidue=0.6
          OrganBiomassRemovalType Graze: FractionLiveToRemove=0.6; FractionDeadToRemove=0.6; FractionLiveToResidue=0.1; FractionDeadToResidue=0.1
          OrganBiomassRemovalType Thin: FractionLiveToRemove=0; FractionDeadToRemove=0; FractionLiveToResidue=0.05; FractionDeadToResidue=0.05
        Constant ExtinctionCoeff: FixedValue=0.5
        Constant StructuralFraction: FixedValue=0.5
        Constant DMConversionEfficiencyFunction: FixedValue=1
        ApexStandard
      GenericOrgan Spike
        PopulationBasedDemandFunction DMDemandFunction
          VariableReference ThermalTime: VariableName=[Phenology].ThermalTime.Value()
          Constant ExpansionStress: FixedValue=1
          VariableReference OrganPopulation: VariableName=[Spike].HeadNumber.Value()
          Constant StartStage: FixedValue=5
          Constant MaximumOrganWt: FixedValue=0.5
          AddFunction GrowthDuration
            VariableReference EarlyReproductive: VariableName=[Phenology].EarlyReproductive.Target.Value()
            VariableReference GrainDevelopment: VariableName=[Phenology].GrainDevelopment.Target.Value()
        Biomass Live
        Biomass Dead
        Constant NReallocationFactor: FixedValue=0
        Constant NRetranslocationFactor: FixedValue=0.1
        Constant MaximumNConc: FixedValue=0.01
        Constant StructuralFraction: FixedValue=0.7
        Constant MinimumNConc: FixedValue=0.003
        MultiplyFunction HeadNumber
          Constant FertileTillers: FixedValue=1
          VariableReference StemPopulation: VariableName=[Structure].TotalStemPopn
        BiomassRemoval BiomassRemovalDefaults
          OrganBiomassRemovalType Harvest: FractionLiveToRemove=0.5; FractionDeadToRemove=0; FractionLiveToResidue=0.1; FractionDeadToResidue=0
          OrganBiomassRemovalType Cut: FractionLiveToRemove=0.8; FractionDeadToRemove=0; FractionLiveToResidue=0; FractionDeadToResidue=0
          OrganBiomassRemovalType Prune: FractionLiveToRemove=0; FractionDeadToRemove=0; FractionLiveToResidue=0.6; FractionDeadToResidue=0
          OrganBiomassRemovalType Graze: FractionLiveToRemove=0.6; FractionDeadToRemove=0; FractionLiveToResidue=0.2; FractionDeadToResidue=0
          OrganBiomassRemovalType Thin: FractionLiveToRemove=0; FractionDeadToRemove=0; FractionLiveToResidue=0.05; FractionDeadToResidue=0
        PhaseBasedSwitch NitrogenDemandSwitch: Start=Emergence; End=StartGrainFill
        PhaseLookup DMRetranslocationFactor
          PhaseLookupValue VegetativeGrowth: Start=Emergence; End=StartGrainFill
            Constant DMRetranslocationFactor: FixedValue=0
          PhaseLookupValue ReproductiveGrowth: Start=StartGrainFill; End=EndGrainFill
            Constant DMRetranslocationFactor: FixedValue=0.5
        Constant SenescenceRate: FixedValue=0; Units=/d
        Constant DetachmentRateFunction: FixedValue=0; Units=/d
        Constant MaintenanceRespirationFunction: FixedValue=0; Units=0-1
        Constant DMConversionEfficiency: FixedValue=1; Units=0-1
        Constant InitialWtFunction: FixedValue=0; Units=g/m^2
        Constant DMReallocationFactor: FixedValue=0
        VariableReference CriticalNConc: VariableName=[Spike].MinimumNConc.Value()
      GenericOrgan Stem
        Biomass Live
        Biomass Dead
        PhaseLookup StructuralFraction
          PhaseLookupValue VegetativeGrowth: Start=Sowing; End=FlagLeaf
            Constant DMRetranslocationFactor: FixedValue=0.9
          PhaseLookupValue ReproductiveGrowth: Start=FlagLeaf; End=HarvestRipe
            Constant DMRetranslocationFactor: FixedValue=0.7
        LinearInterpolationFunction MaximumNConc: XProperty=[Phenology].Stage
          XYPairs: X=[3, 4, 5, 6]; Y=[0.07, 0.04, 0.015, 0.012]
        LinearInterpolationFunction MinimumNConc: XProperty=[Phenology].Stage
          XYPairs: X=[3, 4, 6]; Y=[0.0025, 0.0025, 0.0025]
        PhaseBasedSwitch NitrogenDemandSwitch: Start=Emergence; End=StartGrainFill
        Constant NReallocationFactor: FixedValue=0
        Constant NRetranslocationFactor: FixedValue=0.5
        PhaseLookup DMRetranslocationFactor: same as Replacements.Wheat.Spike.DMRetranslocationFactor
        PartitionFractionDemandFunction DMDemandFunction
          PhaseLookup PartitionFraction
            PhaseLookupValue PreStemElongation: Start=Emergence; End=TerminalSpikelet
              Constant StemFraction: FixedValue=0.4
            PhaseLookupValue StemElongation: Start=TerminalSpikelet; End=FlagLeaf
              Constant StemFraction: FixedValue=0.6
            PhaseLookupValue EarEmergence: Start=FlagLeaf; End=Flowering
              Constant StemFraction: FixedValue=0.3
        BiomassRemoval BiomassRemovalDefaults: same as Replacements.Wheat.Spike.BiomassRemovalDefaults
        DivideFunction PercentWSC
          VariableReference WSC: VariableName=[Stem].Live.StorageWt
          VariableReference StemWt: VariableName=[Stem].Live.Wt
        Constant InitialWtFunction: FixedValue=0; Units=g/m^2
        Constant DetachmentRateFunction: FixedValue=0; Units=/d
        Constant MaintenanceRespirationFunction: FixedValue=0; Units=0-1
        Constant DMConversionEfficiency: FixedValue=1; Units=0-1
        Constant SenescenceRate: FixedValue=0; Units=/d
        Constant DMReallocationFactor: FixedValue=0
        VariableReference CriticalNConc: VariableName=[Stem].MinimumNConc.Value()
      CompositeBiomass AboveGround
        Propertys=[[Leaf].Live, [Leaf].Dead, [Stem].Live, [Stem].Dead, [Spike].Live, [Spike].Dead, [Grain].Live, [Grain].Dead]
      CompositeBiomass AboveGroundLive: Propertys=[[Leaf].Live, [Stem].Live, [Spike].Live, [Grain].Live]
      CompositeBiomass AboveGroundDead: Propertys=[[Leaf].Dead, [Stem].Dead, [Spike].Dead, [Grain].Dead]
      CompositeBiomass BelowGround: Propertys=[[Root].Live, [Root].Dead]
      CompositeBiomass Total
        Propertys=[[Leaf].Live, [Leaf].Dead, [Stem].Live, [Stem].Dead, [Root].Live, [Root].Dead, [Spike].Live, [Spike].Dead, [Grain].Live, [Grain].Dead]
      CompositeBiomass TotalLive
        Propertys=[[Leaf].Live, [Stem].Live, [Root].Live, [Spike].Live, [Grain].Live]
      CompositeBiomass TotalDead
        Propertys=[[Leaf].Dead, [Stem].Dead, [Root].Dead, [Spike].Dead, [Grain].Dead]
      CompositeBiomass Ear: Propertys=[[Spike].Live, [Grain].Live, [Spike].Dead, [Grain].Dead]
        Memo
          The Ear composite biomass object includes the Live and dead pools of all organs within the Ear to allow output for total dry matter and Nutrient contents, including total structural, non-structural and metabolic pools.
      CompositeBiomass StemPlusSpike: Propertys=[[Stem].Live, [Spike].Live, [Stem].Dead, [Spike].Dead]
      CultivarFolder Cultivars
        CultivarFolder New Zealand
          Cultivar Alberic
            Command:
              [Phenology].MinimumLeafNumber.FixedValue = 9
              [Phenology].VrnSensitivity.FixedValue = 7
              [Phenology].PpSensitivity.FixedValue = 3
          Cultivar Amarok
            Command:
              [Phenology].MinimumLeafNumber.FixedValue = 9
              [Phenology].VrnSensitivity.FixedValue = 10
              [Phenology].PpSensitivity.FixedValue = 6
              [Phenology].EarlyReproductivePpSensitivity.FixedValue = 5
              [Structure].Phyllochron.BasePhyllochron.FixedValue = 80
          Cultivar Aspiring
            Command:
              [Phenology].MinimumLeafNumber.FixedValue = 9
              [Phenology].VrnSensitivity.FixedValue = 7
              [Phenology].PpSensitivity.FixedValue = 3
          Cultivar BattenWinter
            Command:
              [Phenology].MinimumLeafNumber.FixedValue = 8
              [Phenology].VrnSensitivity.FixedValue = 8
              [Phenology].PpSensitivity.FixedValue = 5
              [Phenology].EarlyReproductivePpSensitivity.FixedValue = 3
              [Structure].Phyllochron.BasePhyllochron.FixedValue = 100
              [Leaf].ExtinctionCoeff.FixedValue = 0.7
          Cultivar BattenSpring
            Command:
              [Phenology].MinimumLeafNumber.FixedValue = 7
              [Phenology].VrnSensitivity.FixedValue = 0
              [Phenology].PpSensitivity.FixedValue = 5
              [Phenology].EarlyReproductivePpSensitivity.FixedValue = 3
              [Structure].Phyllochron.BasePhyllochron.FixedValue = 100
              [Leaf].ExtinctionCoeff.FixedValue = 0.7
          Cultivar Centaur
            Command:
              [Phenology].MinimumLeafNumber.FixedValue = 9
              [Phenology].VrnSensitivity.FixedValue = 7
              [Phenology].PpSensitivity.FixedValue = 3
          Cultivar Claire
            Command:
              [Phenology].MinimumLeafNumber.FixedValue = 8
              [Phenology].VrnSensitivity.FixedValue = 8
              [Phenology].PpSensitivity.FixedValue = 8
              [Phenology].EarlyReproductivePpSensitivity.FixedValue = 3
              [Structure].Phyllochron.BasePhyllochron.FixedValue = 100
          Cultivar Conquest
            Command:
              [Phenology].MinimumLeafNumber.FixedValue = 9
              [Phenology].VrnSensitivity.FixedValue = 7
              [Phenology].PpSensitivity.FixedValue = 3
          Cultivar Einstein
            Command:
              [Phenology].MinimumLeafNumber.FixedValue = 9
              [Phenology].VrnSensitivity.FixedValue = 7
              [Phenology].PpSensitivity.FixedValue = 3
          Cultivar Exceed
            Command:
              [Phenology].MinimumLeafNumber.FixedValue = 9
              [Phenology].VrnSensitivity.FixedValue = 7
              [Phenology].PpSensitivity.FixedValue = 3
          Cultivar Majestic
            Command:
              [Phenology].MinimumLeafNumber.FixedValue = 9
              [Phenology].VrnSensitivity.FixedValue = 7
              [Phenology].PpSensitivity.FixedValue = 3
          Cultivar Option
            Command:
              [Phenology].MinimumLeafNumber.FixedValue = 9
              [Phenology].VrnSensitivity.FixedValue = 7
              [Phenology].PpSensitivity.FixedValue = 3
          Cultivar Otane
            Command:
              [Phenology].MinimumLeafNumber.FixedValue = 6
              [Phenology].VrnSensitivity.FixedValue = 0
              [Phenology].PpSensitivity.FixedValue = 4
              [Phenology].EarlyReproductivePpSensitivity.FixedValue = 2
              [Structure].Phyllochron.BasePhyllochron.FixedValue = 100
          Cultivar Pennant
            Command:
              [Phenology].MinimumLeafNumber.FixedValue = 9
              [Phenology].VrnSensitivity.FixedValue = 7
              [Phenology].PpSensitivity.FixedValue = 3
          Cultivar Regency
            Command:
              [Phenology].MinimumLeafNumber.FixedValue = 9
              [Phenology].VrnSensitivity.FixedValue = 7
              [Phenology].PpSensitivity.FixedValue = 3
          Cultivar Richmond
            Command:
              [Phenology].MinimumLeafNumber.FixedValue = 9
              [Phenology].VrnSensitivity.FixedValue = 7
              [Phenology].PpSensitivity.FixedValue = 3
          Cultivar Robigus
            Command:
              [Phenology].MinimumLeafNumber.FixedValue = 9
              [Phenology].VrnSensitivity.FixedValue = 7
              [Phenology].PpSensitivity.FixedValue = 3
          Cultivar Rongotea
            Command:
              [Phenology].MinimumLeafNumber.FixedValue = 7
              [Phenology].VrnSensitivity.FixedValue = 0
              [Phenology].PpSensitivity.FixedValue = 2
              [Phenology].EarlyReproductivePpSensitivity.FixedValue = 3
              [Structure].Phyllochron.BasePhyllochron.FixedValue = 100
          Cultivar Rubric
            Command:
              [Phenology].MinimumLeafNumber.FixedValue = 9
              [Phenology].VrnSensitivity.FixedValue = 7
              [Phenology].PpSensitivity.FixedValue = 3
          Cultivar Sage
            Command:
              [Phenology].MinimumLeafNumber.FixedValue = 9
              [Phenology].VrnSensitivity.FixedValue = 7
              [Phenology].PpSensitivity.FixedValue = 3
          Cultivar Saracen
            Command:
              [Phenology].MinimumLeafNumber.FixedValue = 9
              [Phenology].VrnSensitivity.FixedValue = 7
              [Phenology].PpSensitivity.FixedValue = 3
          Cultivar Savannah
            Command:
              [Phenology].MinimumLeafNumber.FixedValue = 9
              [Phenology].VrnSensitivity.FixedValue = 7
              [Phenology].PpSensitivity.FixedValue = 3
          Cultivar Solstice
            Command:
              [Phenology].MinimumLeafNumber.FixedValue = 9
              [Phenology].VrnSensitivity.FixedValue = 7
              [Phenology].PpSensitivity.FixedValue = 3
          Cultivar Tanker
            Command:
              [Phenology].MinimumLeafNumber.FixedValue = 9
              [Phenology].VrnSensitivity.FixedValue = 7
              [Phenology].PpSensitivity.FixedValue = 3
          Cultivar Tribute
            Command:
              [Phenology].MinimumLeafNumber.FixedValue = 9
              [Phenology].VrnSensitivity.FixedValue = 7
              [Phenology].PpSensitivity.FixedValue = 3
          Cultivar Wakanui
            Command:
              [Phenology].MinimumLeafNumber.FixedValue = 8
              [Phenology].VrnSensitivity.FixedValue = 10
              [Phenology].PpSensitivity.FixedValue = 0
              [Phenology].EarlyReproductiveLongDayBase.FixedValue = 4
              [Structure].Phyllochron.BasePhyllochron.FixedValue = 100
              [Phenology].DailyVernalisation.TempResponseProfile.XYPairs.X = 0,1,8
              [Phenology].DailyVernalisation.TempResponseProfile.XYPairs.Y = 0,1.204,0
              [Leaf].ExtinctionCoeff.FixedValue = 0.7
              [Grain].NumberFunction.ValueToHold.GrainsPerGramOfStem.FixedValue = 17
              [Leaf].CohortParameters.MaxArea.AreaLargestLeaves.FixedValue = 3000
          Cultivar Weston
            Command:
              [Phenology].MinimumLeafNumber.FixedValue = 9
              [Phenology].VrnSensitivity.FixedValue = 7
              [Phenology].PpSensitivity.FixedValue = 3
          Cultivar Discovery
            Command:
              [Phenology].MinimumLeafNumber.FixedValue = 8.5
              [Phenology].VrnSensitivity.FixedValue = 0
              [Phenology].PpSensitivity.FixedValue = 0
              [Phenology].GrainDevelopment.Target.FixedValue = 300
              [Structure].Phyllochron.BasePhyllochron.FixedValue = 80
              [Grain].MaximumPotentialGrainSize.FixedValue = 0.08
              [Leaf].CohortParameters.MaxArea.AreaLargestLeaves.FixedValue = 1600
              [Leaf].CohortParameters.SenescenceDuration.Multiplier.FixedValue = 4.2
              [Leaf].CohortParameters.GrowthDuration.Multiplier.FixedValue = 1.8
              [Leaf].CohortParameters.LagDuration.VegetativeGrowth.LagDuration.Multiplier.FixedValue = 1.5
              [Grain].NumberFunction.ValueToHold.GrainsPerGramOfStem.FixedValue = 50
              [Grain].MaximumNConc.FixedValue = 0.02
  DataStore
    ExcelInput ObservedTimeSeries: FileName=Observations\Maize\obsDataMaize_DB.xlsx; SheetNames=[TimeSeriesData]
    ExcelInput NZObserved: FileName=Observations\Maize\obsDataMaize_DB.xlsx; SheetNames=[observed]
    ExcelInput RainShelterN: FileName=Observations\Maize\obsDataMaize_DB.xlsx; SheetNames=[RainShelterNitrogen]
    ExcelInput RainShelterSW: FileName=Observations\Maize\SoilWater.xlsx; SheetNames=[SoilWater]
    ExcelInput RainShelterCob: FileName=Observations\Maize\obsDataMaize_DB.xlsx; SheetNames=[RachisHusk_RainS]
    ExcelInput PhenologySimple: FileName=Observations\Maize\obsDataMaize_DB.xlsx; SheetNames=[PhenologySimple]
    ExcelInput RainShelterSen: FileName=Observations\Maize\LeafSenesCount.xlsx; SheetNames=[EndSenes]
    ExcelInput RainShelterSenStart: FileName=Observations\Maize\LeafSenesCount.xlsx; SheetNames=[StartSenes]
    ExcelInput RainShelterLeafSize: FileName=Observations\Maize\IndLeafData_MaizeRainshelter.xlsx; SheetNames=[MaxLeafSize]
    Input Wheat2015RainShelter: ErrorMessage=The specified file does not exist.; FileName=Observations\Wheat\WheatDataApsimX.txt
    Input WheatLeafData: ErrorMessage=The specified file does not exist.; FileName=Observations\Wheat\WheatLeafDataMeasured.txt
    ExcelInput RainShelterWheatSW: FileName=Observations\Wheat\DailyMeans.xlsx; SheetNames=[ProfileWater]
    Input WheatLAI: ErrorMessage=The specified file does not exist.; FileName=Observations\Wheat\LAI.txt
    Input WheatIntercept: ErrorMessage=The specified file does not exist.; FileName=Observations\Wheat\LightInterception.txt
    Input WheatSoilN: ErrorMessage=The specified file does not exist.; FileName=Observations\Wheat\SoilN.txt
    ExcelInput WheatSoilLayers: FileName=Observations\Wheat\SoilDailyLayer.xlsx; SheetNames=[DailyLayerPC]
  Folder Validation
    Memo Introduction
      The APSIM Maize model has been tested on a range of datasets from around the world to provide tests across a range of environmental conditions.  Tests include ranges in plant population, nitrogen management and irrigation levels, as well as including historical datasets from africa using cultivars developed during the 1960's, through to modern varieties grown in the American mid-West.
    Folder Maize
      Memo
        Testing of APSIM Maize under New Zealand conditions to determine the perormance of the model under temperate conditions with cool springs and mild summers.  A range of trials have been conducted and are detailed below
      Experiment Lincoln2012
        Memo
          ### Lincoln2012 (Rain-Shelter Trail)

          Testing of APSIM Maize under New Zealand conditions was undertaken using the data of [Teixeira_etal_2014].  This dataset includes the impact of three N (0 to 250 kg/ha N) and two water regimes (dryland and fully irrigated) using a rain-shelter structure.  Observations include biomass growth and nitrogen content of individual organs, soil water contents, leaf area index, phenology and yield components. Total biomass ranged from 8000 kg/ha for dryland nil N crops to up to 28000kg/ha for fully irrigated and N fertilised crops.  Dryland crops recovered 25 percent less N from applied fertilizer than irrigated crops.
        Factors
          Factor Nit: Specifications=[Fert]
            Operations Nil
              2012-11-15  [Fertiliser].Apply(0, Fertiliser.Types.UreaN, 10);
              2012-12-20  [Fertiliser].Apply(0, Fertiliser.Types.UreaN, 10);
              2013-01-31  [Fertiliser].Apply(0, Fertiliser.Types.UreaN, 10);
            Operations Low
              2012-11-15  [Fertiliser].Apply(25, Fertiliser.Types.UreaN, 10);
              2012-12-20  [Fertiliser].Apply(50, Fertiliser.Types.UreaN, 10);
            Operations Med
              2012-11-15  [Fertiliser].Apply(50, Fertiliser.Types.UreaN, 10);
              2012-12-20  [Fertiliser].Apply(100, Fertiliser.Types.UreaN, 10);
              2013-01-31  [Fertiliser].Apply(100, Fertiliser.Types.UreaN, 10);
          Factor Irr: Specifications=[Irrig]
            Operations Full
              2012-10-24  [Irrigation].Apply(16);
              2012-10-26  [Irrigation].Apply(10);
              2012-11-03  [Irrigation].Apply(13);
              2012-11-11  [Irrigation].Apply(19.5);
              2012-11-15  [Irrigation].Apply(3.1);
              2012-11-23  [Irrigation].Apply(25);
              2012-11-29  [Irrigation].Apply(25);
              2012-11-30  [Irrigation].Apply(30);
              2012-12-13  [Irrigation].Apply(19);
              2012-12-20  [Irrigation].Apply(26);
              2012-12-20  [Irrigation].Apply(4);
              2012-12-27  [Irrigation].Apply(22);
              2013-01-03  [Irrigation].Apply(39.7);
              2013-01-10  [Irrigation].Apply(42.1);
              2013-01-17  [Irrigation].Apply(46.2);
              2013-01-24  [Irrigation].Apply(44.7);
              2013-01-31  [Irrigation].Apply(49.0);
              2013-02-07  [Irrigation].Apply(37);
              2013-02-14  [Irrigation].Apply(38);
              2013-02-21  [Irrigation].Apply(38);
              2013-02-28  [Irrigation].Apply(33.4);
              2013-03-07  [Irrigation].Apply(39.7);
              2013-03-14  [Irrigation].Apply(31.3);
              2013-03-21  [Irrigation].Apply(24);
              2013-03-28  [Irrigation].Apply(34);
              2013-04-04  [Irrigation].Apply(27.5);
            Operations Nil
              2012-10-24  [Irrigation].Apply(16);
              2012-10-26  [Irrigation].Apply(10);
              2012-11-03  [Irrigation].Apply(13);
              2012-11-11  [Irrigation].Apply(19.5);
              2012-11-15  [Irrigation].Apply(3.1);
              2012-11-23  [Irrigation].Apply(25);
              2012-11-29  [Irrigation].Apply(25);
              2012-12-20  [Irrigation].Apply(4);
              2013-01-31  [Irrigation].Apply(4.3);
        Simulation Lincoln2012
          Weather: FileName=Observations\lincoln.met
          Clock: StartDate=2012-10-01; EndDate=2013-04-25
          Summary summaryfile
          SoilArbitrator Soil Arbitrator
          Zone RainShelter: Area=1; Slope=0
            Soil paparoa_silt_loam: SoilType=lignin_FOM; Region=Generic soil types; State=Canterbury; Latitude=999999; Longitude=999999
              DataSource=Profile descriptions provided by Trevor Webb and data for functional horizions based on SWAMP project results
              Water
                Thickness  BD     AirDry  LL15  DUL   SAT
                200        1.311  0.06    0.06  0.3   0.37
                200        1.474  0.12    0.12  0.3   0.37
                200        1.601  0.1     0.12  0.26  0.32
                200        1.68   0.13    0.13  0.24  0.3
                200        1.68   0.12    0.12  0.24  0.3
                200        1.68   0.15    0.15  0.21  0.3
                200        1.68   0.15    0.15  0.21  0.3
                200        1.68   0.15    0.15  0.21  0.3
                SoilCrop MaizeSoil: LL=[0.084, 0.12, 0.12, 0.15, 0.15, 0.06, 0.06, 0.06]; KL=[0.1, 0.075, 0.06, 0.06, 0.02, 0.005, 0.002, 0.001]; XF=[1, 0.7, 0.3, 0.3, 0.7, 1, 1, 1]
              SoilWater: SummerDate=1-Nov; SummerU=9; SummerCona=4.4; WinterDate=1-Apr; WinterU=6; WinterCona=3; DiffusConst=88; DiffusSlope=35; Salb=0.13; CN2Bare=73; CNRed=20; CNCov=0.8; max_pond=0; Thickness=[200, 200, 200, 200, 200, 200, 200, 200]; SWCON=[0.5, 0.56, 0.31, 0.7, 0.7, 0.7, 0.7, 0.7]; residueinterception=0
              SoilNitrogen: fom_type=[default, manure, mucuna, lablab, shemp, stable]; fract_carb=[0.2, 0.3, 0.54, 0.57, 0.45, 0]; fract_cell=[0.7, 0.3, 0.37, 0.37, 0.47, 0.1]; fract_lign=[0.1, 0.4, 0.09, 0.06, 0.08, 0.9]
              SoilOrganicMatter: RootCN=16; RootWt=6000; SoilCN=11; EnrACoeff=7.4; EnrBCoeff=0.2; OCUnits=Total
                Thickness  OC    FBiom  FInert
                200        3.6   0.03   0.3
                200        0.97  0.02   0.6
                200        0.42  0.01   0.8
                300        0.23  0.01   0.9
                300        0.23  0.01   0.9
                300        0.23  0.01   0.9
              Analysis: Thickness=[200, 200, 200, 300, 300, 300]; PH=[6, 6, 6, 6, 6, 6]; PHUnits=Water; BoronUnits=HotWater
              Sample Initial nitrogen: NO3Units=kgha; NH4Units=kgha; SWUnits=Volumetric; OCUnits=Total; PHUnits=Water
                Thickness  NO3    NH4   SW
                200        16.23  0.9   0.06
                200        10.76  2.92  0.25
                200        7.83   0.57  0.2
                300        6.85   0.98  0.2
                300        4.88   0.84  0.2
                300        1.74   0.54  0.2
              CERESSoilTemperature
            MicroClimate: a_interception=0; b_interception=1; c_interception=0; d_interception=0; soil_albedo=0.23; sun_angle=15; soil_heat_flux_fraction=0.4; night_interception_fraction=0.5; refheight=2; albedo=0.15; emissivity=0.96; RadIntTotal=0
            Irrigation
            Fertiliser
            SurfaceOrganicMatter: PoolName=wheat; type=wheat; mass=0; standing_fraction=0; cnr=80; CriticalResidueWeight=2000; OptimumDecompTemp=20; MaxCumulativeEOS=20; CNRatioDecompCoeff=0.277; CNRatioDecompThreshold=25; TotalLeachRain=25; MinRainToLeach=10; CriticalMinimumOrganicC=0.004; DefaultCPRatio=0; DefaultStandingFraction=0; StandingExtinctCoeff=0.5; FractionFaecesAdded=0.5
              Pools:
                {PoolName=wheat, ResidueType=wheat, Mass=0, CNRatio=80, StandingFraction=0}
              ResidueTypes ResidueTypesList: LoadFromResource=ResidueTypes
            Manager ClimateControl
              StartDate = 2012-10-23
              EndDate = 2013-04-10
```csharp
using System;
using Models.Core;
using APSIM.Shared.Utilities;



using System.Collections.Generic;
using System.Text;
using Models.PMF;
using Models;
using System.Xml.Serialization;

namespace Models
{
	[Serializable] 
	[System.Xml.Serialization.XmlInclude(typeof(Model))]
	public class Script : Model
	{
		[Link] Weather Met;
		[Link] Clock Clock;
    
		[Description("Start Date")]
		public DateTime StartDate { get; set; }
        
		[Description("End Date")]
		public DateTime EndDate { get; set; }
 
    
		[EventSubscribe("PreparingNewWeatherData")]
		private void OnPreparingNewWeatherData(object sender, EventArgs e)
		{
			if ((Clock.Today.Date >= StartDate) && (Clock.Today.Date <= EndDate))
				Met.Rain = 0;		
		}
	}
}
```
            Operations Irrig
              2012-10-24  [Irrigation].Apply(16);
              2012-10-26  [Irrigation].Apply(10);
              2012-11-03  [Irrigation].Apply(13);
              2012-11-11  [Irrigation].Apply(19.5);
              2012-11-15  [Irrigation].Apply(3.1);
              2012-11-23  [Irrigation].Apply(20);
              2012-11-29  [Irrigation].Apply(20);
              2012-11-30  [Irrigation].Apply(30);
              2012-12-13  [Irrigation].Apply(19);
              2012-12-20  [Irrigation].Apply(26);
              2012-12-20  [Irrigation].Apply(4);
              2012-12-27  [Irrigation].Apply(22);
              2013-01-03  [Irrigation].Apply(39.7);
              2013-01-10  [Irrigation].Apply(42.1);
              2013-01-17  [Irrigation].Apply(46.2);
              2013-01-24  [Irrigation].Apply(44.7);
              2013-01-31  [Irrigation].Apply(44.7);
              2013-01-31  [Irrigation].Apply(4.3);
              2013-02-07  [Irrigation].Apply(37);
              2013-02-14  [Irrigation].Apply(38);
              2013-02-21  [Irrigation].Apply(38);
              2013-02-28  [Irrigation].Apply(33.4);
              2013-03-07  [Irrigation].Apply(39.7);
              2013-03-14  [Irrigation].Apply(31.3);
              2013-03-21  [Irrigation].Apply(24);
              2013-03-28  [Irrigation].Apply(34);
              2013-04-04  [Irrigation].Apply(27.5);
            Operations Fert
              2012-11-15  [Fertiliser].Apply(50, Fertiliser.Types.UreaN, 10);
              2012-12-20  [Fertiliser].Apply(100, Fertiliser.Types.UreaN, 10);
              2013-01-31  [Fertiliser].Apply(100, Fertiliser.Types.UreaN, 10);
            Operations Sow
              2012-10-23  [Maize].Sow(population:11, cultivar:"Pioneer_39G12", depth:50, rowSpacing:710);
            Plant Maize: CropType=Maize
            Manager ExtraVariables
```csharp
using System;
using Models.Core;
using System.Collections.Generic;
using System.Text;
using Models.Soils;
using Models.PMF;
using Models;
using System.Xml.Serialization;
using APSIM.Shared.Utilities;

namespace Models
{
	[Serializable] 
	public class Script : Model
	{
		[Link] Clock Clock;
		[Link] Soils.Soil Soil;
		[Link] Models.SurfaceOM.SurfaceOrganicMatter SOM;
		[Link] Weather Met;
		[Link] Fertiliser Fert;
		[Link] Irrigation Irrig;
		[Link] Plant Maize;
		[Link] Zone zone;
					
		[XmlIgnore] public bool InitialDay { get; set; }
		
		[XmlIgnore] public double AccumPlantN { get; set; }
		[XmlIgnore] public double AccumMineralisation { get; set; }
		[XmlIgnore] public double AccumDenit { get; set; }
		[XmlIgnore] public double AccumFert { get; set; }
		[XmlIgnore] public double AccumLeach { get; set; }
		[XmlIgnore] public double AccumDetach { get; set; }
		[XmlIgnore] public double DeltaSoilOMN { get; set; }
		[XmlIgnore] public double DeltaSurfaceOMN { get; set; }
		[XmlIgnore] public double DeltaSoilMineralN { get; set; }
		[XmlIgnore] public double SoilNitrogenContent { get; set; }
		
		[XmlIgnore] public double AccumEO { get; set; }
		[XmlIgnore] public double AccumEP { get; set; }
		[XmlIgnore] public double AccumES { get; set; }
		[XmlIgnore] public double AccumDrainage { get; set; }
		[XmlIgnore] public double AccumRunoff { get; set; }
		[XmlIgnore] public double AccumOutflowLat { get; set; }
		[XmlIgnore] public double AccumIrrigation { get; set; }
		[XmlIgnore] public double AccumRainfall { get; set; }
		[XmlIgnore] public double SoilWaterDeficit { get; set; }
	
		[XmlIgnore] public double  InitialSoilOMN { get; set; }
		[XmlIgnore] public double  InitialSurfaceOMN { get; set; }
		[XmlIgnore] public double  InitialMineralN { get; set; }
		
		[XmlIgnore] public double SWC { get; set; }
		[XmlIgnore] public double DUL { get; set; }
		[XmlIgnore] public double OutFlowLat { get; set; }

		[XmlIgnore] public double FomN { get; set; }
		[XmlIgnore] public double BiomN { get; set; }
		[XmlIgnore] public double HumN { get; set; }
		[XmlIgnore] public double OrganicN { get; set; }
		[XmlIgnore] public double NO3N { get; set; }
		[XmlIgnore] public double NH4N { get; set; }
		[XmlIgnore] public double UreaN { get; set; }
		[XmlIgnore] public double MineralN { get; set; }
		[XmlIgnore] public double DltNMinRes { get; set; }
		[XmlIgnore] public double DltNMinTot { get; set; }
		
		[XmlIgnore] public double LeafExpandedPosition { get; set; }
		[XmlIgnore] public double LeafAppearedPosition { get; set; }
		[XmlIgnore] public double ExpandedLeafNoYesterday { get; set; }
		[XmlIgnore] public double AppearedLeafNoYesterday { get; set; }
		[XmlIgnore] public double MostRecentlyExpandedLeafSize { get; set; }
		[XmlIgnore] public double MostRecentlyAppearedLeafMaxSize { get; set; }
        
		[EventSubscribe("Commencing")]
		private void OnSimulationCommencing(object sender, EventArgs e)
		{
			InitialDay = true;
			LeafExpandedPosition = 0;
			LeafAppearedPosition = 0;
			ExpandedLeafNoYesterday = 0;
			AppearedLeafNoYesterday = 0;
			MostRecentlyExpandedLeafSize = 0;
			MostRecentlyAppearedLeafMaxSize = 0;
		}
		
		[EventSubscribe("DoManagement")]
		private void OnDoManagement(object sender, EventArgs e)
		{
			//!!!!!! Nitrogen balance components !!!!!!
			//!!!!!!^^^^^^^^^^^^^^^^^^^^^^^^^^^^^!!!!!!
			FomN = MathUtilities.Sum(Soil.SoilNitrogen.FOMN);
			HumN = MathUtilities.Sum(Soil.SoilNitrogen.HumicN);
			BiomN = MathUtilities.Sum(Soil.SoilNitrogen.MicrobialN);
			OrganicN = FomN + HumN + BiomN;
			NO3N = MathUtilities.Sum(Soil.NO3N);
			NH4N = MathUtilities.Sum(Soil.NH4N);
			UreaN = MathUtilities.Sum(Soil.SoilNitrogen.urea);
			MineralN = NO3N + NH4N + UreaN; 
			DltNMinRes = MathUtilities.Sum(Soil.SoilNitrogen.dlt_n_min_res);
			DltNMinTot = MathUtilities.Sum(Soil.SoilNitrogen.MineralisedN);
			int layers = Soil.Thickness.Length;
			if (InitialDay == true)
			{
				InitialSurfaceOMN = SOM.N;
				InitialSoilOMN = OrganicN;
				InitialMineralN = MineralN;
				InitialDay = false;
			}
			AccumFert += Fert.NitrogenApplied;
			DeltaSurfaceOMN = SOM.N - InitialSurfaceOMN;
			AccumLeach = AccumLeach - Soil.SoilWater.LeachNH4 - Soil.SoilWater.LeachNO3 - Soil.SoilWater.LeachUrea; //Fails
			AccumMineralisation += MathUtilities.Sum(Soil.SoilNitrogen.MineralisedN);
			AccumDenit -= MathUtilities.Sum(Soil.SoilNitrogen.Denitrification);
			AccumPlantN -= (double)zone.Get("Maize.Root.NUptake");
			DeltaSoilOMN = OrganicN - InitialSoilOMN;
			DeltaSoilMineralN = MineralN - InitialMineralN;
			SoilNitrogenContent = MineralN;
			
			//!!!!!! Water balance components !!!!!!
			//!!!!!!^^^^^^^^^^^^^^^^^^^^^^^^^^!!!!!!

			AccumIrrigation += Irrig.IrrigationApplied;
			AccumRainfall += Met.Rain;
			//AccumEP -= (double)zone.Get("[Maize].Leaf.Transpiration");
			AccumEP -= (double)zone.Get("Maize.Root.WaterUptake");
			SoilWaterDeficit = (SWC - DUL);
			double OutFlowLat = MathUtilities.Sum(Soil.SoilWater.outflow_lat);
			AccumOutflowLat -= OutFlowLat;
			
			//Leaf number variable
			ExpandedLeafNoYesterday = (double)zone.Get("Maize.Leaf.ExpandedCohortNo");
			AppearedLeafNoYesterday = (double)zone.Get("Maize.Leaf.AppearedCohortNo");
		}
		
		[EventSubscribe("DoManagementCalculations")]
		private void OnDoManagementCalculations(object sender, EventArgs e)
		{
			FomN = MathUtilities.Sum(Soil.SoilNitrogen.FOMN);
			HumN = MathUtilities.Sum(Soil.SoilNitrogen.HumicN);
			BiomN = MathUtilities.Sum(Soil.SoilNitrogen.MicrobialN);
			
			
			AccumEO -= Soil.SoilWater.Eo;
			AccumES -= Soil.SoilWater.Es; 
			AccumDrainage -= Soil.SoilWater.Drainage;
			AccumRunoff -= Soil.SoilWater.Runoff;
			SWC = MathUtilities.Sum(Soil.SoilWater.SWmm);
			DUL = MathUtilities.Sum(Soil.SoilWater.DULmm);
			
			if ((double)zone.Get("Maize.Leaf.ExpandedCohortNo") > ExpandedLeafNoYesterday)
			{
				LeafExpandedPosition = (double)zone.Get("Maize.Leaf.ExpandedCohortNo");
				MostRecentlyExpandedLeafSize = (double)zone.Get("Maize.Leaf.CohortSize[" + (int)LeafExpandedPosition + "]");
			}
			//else
			//	LeafExpandedPosition = 0;
			
			if ((double)zone.Get("Maize.Leaf.AppearedCohortNo") > AppearedLeafNoYesterday)
			{
				LeafAppearedPosition = (double)zone.Get("Maize.Leaf.AppearedCohortNo");
				MostRecentlyAppearedLeafMaxSize = (double)zone.Get("Maize.Leaf.CohortParameters.MaxArea.Value()");
			}
			//else
			//LeafAppearedPosition = 0;
			
		}
	}
}
```
            Manager Harvesting
```csharp
using System;
using Models.Core;
using System.Collections.Generic;
using System.Text;
using Models.Soils;
using Models.PMF;
using Models;
using System.Xml.Serialization;
using APSIM.Shared.Utilities;

namespace Models
{
	[Serializable] 
	public class Script : Model
	{
		[Link] Plant Maize;
		[Link] Zone zone;
					
        
		[EventSubscribe("Commencing")]
		private void OnSimulationCommencing(object sender, EventArgs e)
		{
		}
		
		[EventSubscribe("DoManagement")]
		private void OnDoManagement(object sender, EventArgs e)
		{
			if (Maize.Phenology.CurrentPhaseName == "ReadyForHarvesting")
			{
				Maize.Harvest();
				Maize.EndCrop();
			}
		}
		
		[EventSubscribe("DoManagementCalculations")]
		private void OnDoManagementCalculations(object sender, EventArgs e)
		{
			
		}
	}
}
```
            Report MaizeReport: EventNames=[Clock].DoReport
              VariableNames:
                [Clock].Today
                [ExtraVariables].Script.AccumPlantN
                [ExtraVariables].Script.AccumMineralisation
                [ExtraVariables].Script.AccumDenit
                [ExtraVariables].Script.AccumFert
                [ExtraVariables].Script.AccumLeach
                [ExtraVariables].Script.AccumDetach
                [ExtraVariables].Script.DeltaSoilOMN
                [ExtraVariables].Script.DeltaSurfaceOMN
                [ExtraVariables].Script.DeltaSoilMineralN
                [ExtraVariables].Script.SWC
                [ExtraVariables].Script.DUL
                [ExtraVariables].Script.OutFlowLat
                [ExtraVariables].Script.AccumEO
                [ExtraVariables].Script.AccumEP
                [ExtraVariables].Script.AccumES
                [ExtraVariables].Script.AccumDrainage
                [ExtraVariables].Script.AccumRunoff
                [ExtraVariables].Script.AccumRainfall
                [ExtraVariables].Script.AccumIrrigation
                [ExtraVariables].Script.AccumOutflowLat
                [ExtraVariables].Script.SoilWaterDeficit
                [ExtraVariables].Script.SoilNitrogenContent
                [ExtraVariables].Script.FomN
                [ExtraVariables].Script.HumN
                [ExtraVariables].Script.BiomN
                [ExtraVariables].Script.DltNMinRes
                [ExtraVariables].Script.DltNMinTot
                [Soil].SoilWater.SW
                [Soil].SoilWater.Eo
                [Soil].SoilWater.Es
                [Soil].SoilWater.Drainage
                [Soil].SoilWater.Runoff
                [Soil].SoilWater.pond
                sum([Soil].SoilWater.SWmm) as ProfileWater
                [Soil].NO3N
                [MicroClimate].net_radn
                [MicroClimate].peta
                [MicroClimate].petr
                [Maize].Grain.Live.Wt
                [Maize].Stem.Live.Wt
                [Maize].EarLive.Wt
                [Maize].Leaf.Live.Wt
                [Maize].Root.Live.Wt
                [Maize].Husk.Live.Wt
                [Maize].Rachis.Live.Wt
                [Maize].Tastle.Live.Wt
                [Maize].EarLive.N
                [Maize].Grain.Live.N
                [Maize].Stem.Live.N
                [Maize].Leaf.Live.N
                [Maize].Root.Live.N
                [Maize].Rachis.Live.N
                [Maize].Husk.Live.N
                [Maize].Root.WaterSupply
                [Maize].Root.WaterUptake
                [Maize].Leaf.Transpiration
                [Maize].Leaf.WaterDemand
                [Maize].Root.Depth
                [Maize].Leaf.CoverTotal
                [Maize].Leaf.CoverDead
                [Maize].Leaf.LAI
                [Maize].Leaf.Height
                [Maize].Leaf.CohortParameters.MaxArea.Value()
                [Maize].Leaf.Fw
                [Maize].Leaf.Photosynthesis.FVPD.Value()
                [Maize].Leaf.Photosynthesis.FT.Value()
                [Maize].Leaf.Fn
                [Maize].Phenology.CurrentPhaseName
                [Maize].Phenology.Stage
                [Maize].AboveGroundLive.N
                [Maize].AboveGroundLive.Wt
                [Maize].Total.N
                [Maize].Total.Wt
                [Maize].Arbitrator.N.TotalPlantDemand
                [Maize].Phenology.Stage
                [Maize].Leaf.ExpandedCohortNo
                [Maize].Leaf.AppearedCohortNo
                [Maize].Leaf.DeadCohortNo
                [Maize].Leaf.InitialisedCohortNo
                [Maize].Structure.MainStemFinalNodeNo
                [Maize].Structure.LeafTipsAppeared
                [Maize].Structure.MainStemPrimordiaNo
                [Maize].Leaf.CohortArea[1:30]
                [Maize].Leaf.CohortSLA[1:30]
                [Maize].Leaf.CohortParameters.SpecificLeafAreaMax.Value()
                [Maize].Leaf.CohortParameters.SpecificLeafAreaMin.Value()
                [Maize].Arbitrator.N.TotalPlantDemand
                [Maize].Arbitrator.N.TotalPlantSupply
                [Maize].Arbitrator.DM.TotalFixationSupply
                [Maize].Arbitrator.DM.TotalPlantDemand
                [Maize].Arbitrator.DM.Allocated
                [Maize].Arbitrator.DM.SinkLimitation
                [Maize].Arbitrator.DM.NutrientLimitation
                [Maize].Leaf.CohortParameters.GrowthDuration.Value()
                [Maize].Leaf.CohortParameters.LagDuration.Value()
                [Maize].Leaf.CohortParameters.SenescenceDuration.Value()
                [Maize].Structure.Phyllochron.Value()
                [Maize].Structure.Height
                [Maize].Stem.DMDemandFunction.PotentialDMAccumulation.Value()
                [Maize].Stem.DMDemandFunction.HightLimitedDMAccumulation.Value()
                [Maize].Structure.MainStemPrimordiaNo
                [Maize].Grain.NumberFunction.Value()
                [ExtraVariables].Script.LeafAppearedPosition
                [ExtraVariables].Script.MostRecentlyAppearedLeafMaxSize
                [ExtraVariables].Script.LeafExpandedPosition
                [ExtraVariables].Script.MostRecentlyExpandedLeafSize
                [Maize].Leaf.DeadCohortNo
                [Phenology].ThermalTime.Value()
                [Maize].Leaf.SenescingCohortNo
                [Maize].Stem.MaximumNConc.Value()
                [Maize].Stem.MinimumNConc.Value()
                [Maize].Stem.Live.NConc
                [Maize].Leaf.Live.NConc
                [Maize].Grain.Live.NConc
                [Maize].Husk.Live.NConc
                [Maize].Rachis.Live.NConc
                [Maize].Leaf.Dead.NConc
                [Maize].Leaf.Photosynthesis.RueAct
                [Maize].Stem.Live.StructuralWt
                [Maize].Grain.GrowthRateGrainDevelopment.Value()
            Report MaizeHarvestReport: EventNames=[Maize].Harvesting
              VariableNames:
                [Clock].Today
                [Maize].Phenology.CurrentStageName as Stage
                [Maize].Grain.Live.Wt as GrainWt
                [Maize].Stem.Live.Wt
                [Maize].EarLive.Wt
                [Maize].Leaf.Live.Wt
                [Maize].Root.Live.Wt
                [Maize].Husk.Live.Wt
                [Maize].Rachis.Live.Wt
                [Maize].EarLive.N
                [Maize].Grain.Live.N
                [Maize].Stem.Live.N
                [Maize].Leaf.Live.N
                [Maize].Root.Live.N
                [Maize].Root.Depth
                [Maize].AboveGround.N
                [Maize].AboveGround.Wt as Biomass
                [Maize].Total.N
                [Maize].Total.Wt
                max of [Maize].Leaf.LAI from [Maize].Sowing to [Maize].Harvesting as LAImax
                [Maize].Grain.NumberFunction.Value() as GPSM
                [Maize].Grain.Size.Value() as GrainSize
                [Maize].Population
            SoluteManager
    Folder Wheat
      Memo
        Testing of APSIM Maize under New Zealand conditions to determine the perormance of the model under temperate conditions with cool springs and mild summers.  A range of trials have been conducted and are detailed below
      Experiment Lincoln2015
        Memo: same as Validation.Maize.Lincoln2012.memo
        Factors
          Factor Nit
            Factor 0
              Specifications:
                [StateFactors].Script.NitFactor = 0
                [Fert]
              Operations 0
                2015-10-09  [Fertiliser].Apply(0, Fertiliser.Types.UreaN, 10);
                2015-10-29  [Fertiliser].Apply(0, Fertiliser.Types.UreaN, 10);
                2015-11-19  [Fertiliser].Apply(0, Fertiliser.Types.UreaN, 10);
                2015-10-09  [Irrigation].Apply(10);
                Memo
                  Uniques fertigation event
            Factor 50
              Specifications:
                [StateFactors].Script.NitFactor = 50
                [Fert]
              Operations 50
                2015-10-09  [Irrigation].Apply(10);
                2015-10-09  [Fertiliser].Apply(0, Fertiliser.Types.UreaN, 10);
                2015-10-29  [Fertiliser].Apply(25, Fertiliser.Types.UreaN, 10);
                2015-11-19  [Fertiliser].Apply(25, Fertiliser.Types.UreaN, 10);
            Factor 250
              Specifications:
                [StateFactors].Script.NitFactor = 250
                [Fert]
              Operations 250
                2015-10-09  [Fertiliser].Apply(50, Fertiliser.Types.UreaN, 10);
                2015-10-29  [Fertiliser].Apply(100, Fertiliser.Types.UreaN, 10);
                2015-11-19  [Fertiliser].Apply(100, Fertiliser.Types.UreaN, 10);
          Factor Irr
            Factor Full
              Specifications:
                [Irrig]
                [StateFactors].Script.IrrFactor = true
              Operations Full
                2015-09-10  [Irrigation].Apply(15);
                2015-09-19  [Irrigation].Apply(5);
                2015-09-23  [Irrigation].Apply(2.5);
                2015-09-26  [Irrigation].Apply(2);
                2015-09-30  [Irrigation].Apply(10);
                2015-10-01  [Irrigation].Apply(5);
                2015-10-16  [Irrigation].Apply(15);
                2015-10-22  [Irrigation].Apply(0);
                2015-10-29  [Irrigation].Apply(30);
                2015-11-06  [Irrigation].Apply(12.2);
                2015-11-12  [Irrigation].Apply(13);
                2015-11-26  [Irrigation].Apply(39);
                2015-12-03  [Irrigation].Apply(40);
                2015-12-10  [Irrigation].Apply(40);
                2015-12-17  [Irrigation].Apply(39.7);
                2015-12-24  [Irrigation].Apply(35);
                2016-01-07  [Irrigation].Apply(30);
                2016-01-14  [Irrigation].Apply(33);
                2016-01-21  [Irrigation].Apply(21);
                2016-02-03  [Irrigation].Apply(30);
                2016-02-04  [Irrigation].Apply(40);
            Factor Nil
              Specifications:
                [Irrig]
                [StateFactors].Script.IrrFactor = false
              Operations Nil
                2015-09-10  [Irrigation].Apply(15);
                2015-09-19  [Irrigation].Apply(5);
                2015-09-23  [Irrigation].Apply(2);
                2015-09-26  [Irrigation].Apply(2);
                2015-09-30  [Irrigation].Apply(10);
                2015-10-01  [Irrigation].Apply(5);
                2015-10-09  [Irrigation].Apply(10);
                2015-12-24  [Irrigation].Apply(25);
                2016-02-03  [Irrigation].Apply(30);
                2016-02-04  [Irrigation].Apply(40);
                2015-11-03  [Irrigation].Apply(10);
                Memo
                  Have added an extra irrigation, on 3 Nov,

                  Data indcates water applied but no notes of it RFZ
        Simulation Lincoln2015
          Weather: FileName=Observations\lincoln.met
          Clock: StartDate=2015-09-07; EndDate=2016-02-15
          Summary summaryfile
          SoilArbitrator Soil Arbitrator
          Zone RainShelter: Area=1; Slope=0
            Plant Wheat: CropType=Wheat
            MicroClimate: a_interception=0; b_interception=1; c_interception=0; d_interception=0; soil_albedo=0.23; sun_angle=15; soil_heat_flux_fraction=0.4; night_interception_fraction=0.5; refheight=2; albedo=0.15; emissivity=0.96; RadIntTotal=0
            Irrigation
            Fertiliser
            SurfaceOrganicMatter: same as Validation.Maize.Lincoln2012.Lincoln2012.RainShelter.SurfaceOrganicMatter
            Manager ClimateControl
              StartDate = 2015-09-10
              EndDate = 2016-02-28
              script: same as in Validation.Maize.Lincoln2012.Lincoln2012.RainShelter.ClimateControl
            Operations Irrig
              2015-09-15  [Irrigation].Apply(15);
              2015-09-19  [Irrigation].Apply(5);
              2015-09-23  [Irrigation].Apply(2);
              2015-09-26  [Irrigation].Apply(2);
              2015-09-30  [Irrigation].Apply(10);
              2015-10-01  [Irrigation].Apply(5);
              2015-10-09  [Irrigation].Apply(10);
              2015-10-16  [Irrigation].Apply(15);
              2015-10-22  [Irrigation].Apply(0);
              2015-10-29  [Irrigation].Apply(30);
              2015-11-06  [Irrigation].Apply(12.2);
              2015-11-12  [Irrigation].Apply(13);
              2015-11-19  [Irrigation].Apply(24);
              2015-11-26  [Irrigation].Apply(39);
              2015-12-03  [Irrigation].Apply(40);
              2015-12-10  [Irrigation].Apply(40);
              2015-12-17  [Irrigation].Apply(39.7);
              2015-12-24  [Irrigation].Apply(35);
              2016-01-07  [Irrigation].Apply(30);
              2016-01-14  [Irrigation].Apply(33);
              2016-01-21  [Irrigation].Apply(21);
              2016-02-03  [Irrigation].Apply(30);
              2016-02-04  [Irrigation].Apply(40);
            Operations IrrigExtra
            Operations Fert
              2015-10-09  [Fertiliser].Apply(0, Fertiliser.Types.UreaN, 10);
              2015-10-29  [Fertiliser].Apply(0, Fertiliser.Types.UreaN, 10);
              2015-11-19  [Fertiliser].Apply(0, Fertiliser.Types.UreaN, 10);
            Operations Sow
              2015-09-10  [Wheat].Sow(population:200, cultivar:"Discovery", depth:80, rowSpacing:130);
            Manager Harvesting
```csharp
using System;
using Models.Core;
using System.Collections.Generic;
using System.Text;
using Models.Soils;
using Models.PMF;
using Models;
using System.Xml.Serialization;
using APSIM.Shared.Utilities;

namespace Models
{
	[Serializable] 
	public class Script : Model
	{
		[Link] Plant Wheat;
		[Link] Zone zone;
					
        
		[EventSubscribe("Commencing")]
		private void OnSimulationCommencing(object sender, EventArgs e)
		{
		}
		
		[EventSubscribe("DoManagement")]
		private void OnDoManagement(object sender, EventArgs e)
		{
			if (Wheat.Phenology.CurrentPhaseName == "Ripening")
			{
				Wheat.Harvest();
				Wheat.EndCrop();
			}
		}
		[EventSubscribe("DoManagementCalculations")]
		private void OnDoManagementCalculations(object sender, EventArgs e)
		{
			
		}
	}
}
```
            Report WheatReport: EventNames=[Clock].DoReport
              VariableNames:
                [Clock].Today
                [Soil].SoilWater.SW
                [Soil].SoilWater.LL15
                [Soil].SoilWater.DUL
                [Soil].SoilWater.SAT
                [Soil].SoilWater.Eo
                [Soil].SoilWater.Es
                [Soil].SoilWater.Drainage
                [Soil].SoilWater.Runoff
                [Soil].SoilWater.pond
                sum([Soil].SoilWater.SWmm) as ProfileWater
                [Soil].NO3N
                [Soil].SoilWater.SW
                sum([Soil].NO3N) as ProfileNitrate
                sum ([Soil].SoilNitrogen.MineralisedN ) as MineralisedN
                [WheatExtraVariables].Script.AccumMineralisation
                [WheatExtraVariables].Script.AccumFert
                [MicroClimate].net_radn
                [MicroClimate].peta
                [MicroClimate].petr
                [Wheat].Grain.Live.Wt
                [Wheat].Grain.Live.Wt*10 as Grain_kgha
                [Wheat].Stem.Live.Wt
                [Wheat].Stem.Live.Wt*10 as Stem_kgha
                [Wheat].Ear.Wt
                [Wheat].Leaf.Live.Wt
                [Wheat].Leaf.Live.Wt*10 as Leaf_kgha
                [Wheat].Root.Live.Wt
                [Wheat].Husk.Live.Wt
                [Wheat].Spike.Live.Wt
                [Wheat].Spike.Live.Wt*10 as Spike_kgha
                [Wheat].Tastle.Live.Wt
                [Wheat].EarLive.N
                [Wheat].Grain.Live.N
                [Wheat].Stem.Live.N
                [Wheat].Leaf.Live.N
                [Wheat].Root.Live.N
                [Wheat].EarLive.N
                [Wheat].Grain.Live.N*10 as GrainN_kg
                [Wheat].Stem.Live.N*10 as StemN_kg
                [Wheat].Leaf.Live.N*10 as LeafN_kg
                [Wheat].Root.Live.N*10 as RootN_kg
                [Wheat].Root.WaterSupply
                [Wheat].Root.WaterUptake
                [Wheat].Leaf.Transpiration
                [Wheat].Leaf.WaterDemand
                [Wheat].Root.Depth
                [Wheat].Leaf.CoverTotal
                [Wheat].Leaf.CoverDead
                [Wheat].Leaf.LAI
                [Wheat].Leaf.Height
                [Wheat].Leaf.CohortParameters.MaxArea.Value()
                [Wheat].Leaf.Fw
                [Wheat].Leaf.Photosynthesis.FVPD.Value()
                [Wheat].Leaf.Photosynthesis.FT.Value()
                [Wheat].Leaf.Fn
                [Wheat].Phenology.CurrentPhaseName
                [Wheat].Phenology.CurrentStageName
                [Wheat].Phenology.Stage
                [Wheat].AboveGroundLive.N
                [Wheat].AboveGroundLive.Wt
                [Wheat].Total.N
                [Wheat].Total.Wt
                [Wheat].Total.N*10 as TotalN_Kg
                [Wheat].Arbitrator.N.TotalPlantDemand
                [Wheat].Phenology.Stage
                [Wheat].Leaf.ExpandedCohortNo
                [Wheat].Leaf.AppearedCohortNo
                [Wheat].Leaf.DeadCohortNo
                [Wheat].Leaf.InitialisedCohortNo
                [Wheat].Structure.MainStemFinalNodeNo
                [Wheat].Structure.LeafTipsAppeared
                [Wheat].Structure.MainStemPrimordiaNo
                [Wheat].Leaf.CohortArea[1:30]
                [Wheat].Leaf.CohortSLA[1:30]
                [Wheat].Leaf.CohortParameters.SpecificLeafAreaMax.Value()
                [Wheat].Leaf.CohortParameters.SpecificLeafAreaMin.Value()
                [Wheat].Arbitrator.N.TotalPlantDemand
                [Wheat].Arbitrator.N.TotalPlantSupply
                [Wheat].Arbitrator.DM.TotalFixationSupply
                [Wheat].Arbitrator.DM.TotalPlantDemand
                [Wheat].Arbitrator.DM.Allocated
                [Wheat].Arbitrator.DM.SinkLimitation
                [Wheat].Arbitrator.DM.NutrientLimitation
                [Wheat].Leaf.CohortParameters.GrowthDuration.Value()
                [Wheat].Leaf.CohortParameters.LagDuration.Value()
                [Wheat].Leaf.CohortParameters.SenescenceDuration.Value()
                [Wheat].Structure.Phyllochron.Value()
                [Wheat].Structure.Height
                [Wheat].Stem.DMDemandFunction.PotentialDMAccumulation.Value()
                [Wheat].Stem.DMDemandFunction.HightLimitedDMAccumulation.Value()
                [Wheat].Structure.MainStemPrimordiaNo
                [Wheat].Grain.NumberFunction.Value()
                [Wheat].Leaf.DeadCohortNo
                [Phenology].ThermalTime.Value()
                [Wheat].Leaf.SenescingCohortNo
                [Wheat].Stem.MaximumNConc.Value()
                [Wheat].Stem.MinimumNConc.Value()
                [Wheat].Stem.Live.NConc
                [Wheat].Leaf.Live.NConc
                [Wheat].Grain.Live.NConc
                [Wheat].Husk.Live.NConc
                [Wheat].Spike.Live.NConc
                [Wheat].Leaf.Dead.NConc
                [Wheat].Leaf.Photosynthesis.RueAct
                [Wheat].Stem.Live.StructuralWt
                [Wheat].Grain.GrowthRateGrainDevelopment.Value()
                [NitFactors].Script.NitFactor
                [Wheat].WaterSupplyDemandRatio
                [Wheat].Leaf.Fw
                [Wheat].Leaf.Fn
            Report WheatHarvestReport: EventNames=[Wheat].Harvesting
              VariableNames:
                [Clock].Today
                [Wheat].Phenology.CurrentStageName as Stage
                [Wheat].Grain.Live.Wt as GrainWt
                [Wheat].Stem.Live.Wt
                [Wheat].EarLive.Wt
                [Wheat].Leaf.Live.Wt
                [Wheat].Root.Live.Wt
                [Wheat].Husk.Live.Wt
                [Wheat].Rachis.Live.Wt
                [Wheat].EarLive.N
                [Wheat].Grain.Live.N
                [Wheat].Stem.Live.N
                [Wheat].Leaf.Live.N
                [Wheat].Root.Live.N
                [Wheat].Root.Depth
                [Wheat].AboveGround.N
                [Wheat].AboveGround.Wt as Biomass
                [Wheat].Total.N
                [Wheat].Total.Wt
                max of [Wheat].Leaf.LAI from [Wheat].Sowing to [Wheat].Harvesting as LAImax
                [Wheat].Grain.NumberFunction.Value() as GPSM
                [Wheat].Grain.Size.Value() as GrainSize
                [Wheat].Population
            Soil TempletonSiltLoam: SoilType=NZ_sedementary; Region=Plains; State=Canterbury; Country=New Zealand; Latitude=0; Longitude=0
              DataSource=Generic profile descriptions provided by Trevor Webb and data for functional horizions based on SWAMP project results
              Comments=Bulk density values were measured on the fine earth fraction so values entered into apsim soil are adjusted down to account for stone content (assuming stones are inert from all soil process so their mass and volume is removed from model paramaters).  SAT, DUL, LL15 and Air dry have been adjusted down to account for stone content.  OC has not been adjusted so the model will get the correct carbon and N amounts using the adjusted BD.
              Analysis: Thickness=[180, 150, 400, 270, 500, -3300]; PH=[6, 6, 6, 6, 6, 6]; PHUnits=Water; BoronUnits=HotWater
              SoilWater: SummerDate=1-oct; SummerU=6; SummerCona=3; WinterDate=1-Apr; WinterU=2; WinterCona=3; DiffusConst=0; DiffusSlope=0; Salb=0.13; CN2Bare=77; CNRed=0; CNCov=0.8; max_pond=0; Thickness=[200, 200, 200, 200, 200, 200, 200, 200, 200]; SWCON=[1, 1, 1, 1, 1, 1, 1, 1, 1]; residueinterception=0
              SoilNitrogen: fom_type=[default, manure, mucuna, lablab, shemp, stable]; fract_carb=[0.2, 0.3, 0.54, 0.57, 0.45, 0]; fract_cell=[0.7, 0.3, 0.37, 0.37, 0.47, 0.1]; fract_lign=[0.1, 0.4, 0.09, 0.06, 0.08, 0.9]
              SoilOrganicMatter: RootCN=40; RootWt=1000; SoilCN=11; EnrACoeff=7.4; EnrBCoeff=0.2; OCUnits=Total
                Thickness  OC        FBiom      FInert
                180        2.6251    0.03       0.437121
                150        1.24694   0.02       0.656885
                400        0.316004  0.0116634  0.849635
                270        0.207954  0.0102229  0.94496
                500        0.200366  0.0100221  0.982659
                500        0.2       0.01       0.93
              Sample: NO3Units=kgha; NH4Units=kgha; SWUnits=Volumetric; OCUnits=Total; PHUnits=Water
                Thickness  NO3   NH4    SW
                150        7.9   1.065  0.18
                150        6.7   1.155  0.18
                300        0.3   0.43   0.26
                300        1.31  1.09   0.26
                300        2.6   0.93   0.23
                300        4.56  0      0.28
                300        0.1   0      0.29
                Memo
                  Using the retest sample values.
              Water
                Thickness  BD     AirDry  LL15  DUL   SAT
                150        1      0.05    0.08  0.28  0.34
                150        1.324  0.12    0.15  0.28  0.34
                300        1.35   0.1     0.17  0.28  0.34
                300        1.301  0.08    0.17  0.28  0.34
                300        1.301  0.06    0.25  0.28  0.34
                300        1.301  0.06    0.28  0.28  0.34
                300        1.301  0.1     0.26  0.28  0.34
                SoilCrop WheatSoil: LL=[0.12, 0.08, 0.12, 0.12, 0.12, 0.12, 0.12]; KL=[0.06, 0.06, 0.05, 0.03, 0.02, 0.01, 0.001]; XF=[1, 1, 1, 1, 1, 1, 1]
              CERESSoilTemperature
            Manager StateFactors
              IrrFactor = False
              NitFactor = 0
```csharp
using System;
using Models.Core;
using System.Collections.Generic;
using System.Text;
using Models.Soils;
using Models.PMF;
using Models;
using System.Xml.Serialization;
using APSIM.Shared.Utilities;

namespace Models
{
	[Serializable] 
	public class Script : Model
	{
		[Link] Clock Clock;
		[Link] Irrigation Irrigation;
		[Link] Soil ThisSoil;
		[Description("Amount of Irrgation be applied 0/1")]
		public bool IrrFactor { get; set; }
		[Description("Amount of fertiliser to be applied (kg/ha)")]
		public double NitFactor { get; set; }
		
          
		private void SetSoilLayers()
		{
        
			int i = 0;
			if ((IrrFactor == false) && (NitFactor == 0))
			{
				if (ThisSoil.Thickness.Length != 7)
				{
					throw new Exception("Soil layer exception");
				}
			 
				ThisSoil.LL15[0] = 0.06;
				ThisSoil.LL15[1] = 0.06;
				ThisSoil.LL15[2] = 0.08;
				ThisSoil.LL15[3] = 0.14;
				ThisSoil.LL15[4] = 0.16;
				ThisSoil.LL15[5] = 0.16;
				ThisSoil.LL15[6] = 0.11;
				ThisSoil.DUL[0] = 0.34;
				ThisSoil.DUL[1] = 0.3;
				ThisSoil.DUL[2] = 0.28;
				ThisSoil.DUL[3] = 0.3;
				ThisSoil.DUL[4] = 0.3;
				ThisSoil.DUL[5] = 0.30;
				ThisSoil.DUL[6] = 0.3;
				ThisSoil.SAT[0] = 0.4;
				ThisSoil.SAT[1] = 0.4;
				ThisSoil.SAT[2] = 0.4;
				ThisSoil.SAT[3] = 0.4;
				ThisSoil.SAT[4] = 0.4;
				ThisSoil.SAT[5] = 0.4;
				ThisSoil.SAT[6] = 0.4;
				ThisSoil.SoilWater.Reset();
			}   
			if ((IrrFactor == false) && (NitFactor == 50))
			{
				if (ThisSoil.Thickness.Length != 7)
				{
					throw new Exception("Soil layer exception");
				}
			 
				ThisSoil.LL15[0] = 0.07;
				ThisSoil.LL15[1] = 0.12;
				ThisSoil.LL15[2] = 0.17;
				ThisSoil.LL15[3] = 0.20;
				ThisSoil.LL15[4] = 0.26;
				ThisSoil.LL15[5] = 0.32;
				ThisSoil.LL15[6] = 0.30;
				ThisSoil.DUL[0] = 0.30;
				ThisSoil.DUL[1] = 0.26;
				ThisSoil.DUL[2] = 0.29;
				ThisSoil.DUL[3] = 0.25;
				ThisSoil.DUL[4] = 0.29;
				ThisSoil.DUL[5] = 0.34;
				ThisSoil.DUL[6] = 0.30;
				ThisSoil.SAT[0] = 0.34;
				ThisSoil.SAT[1] = 0.34;
				ThisSoil.SAT[2] = 0.34;
				ThisSoil.SAT[3] = 0.34;
				ThisSoil.SAT[4] = 0.34;
				ThisSoil.SAT[5] = 0.34;
				ThisSoil.SAT[6] = 0.34;
				ThisSoil.SoilWater.Reset();
			}   
			if ((IrrFactor == false) && (NitFactor == 50))
			{
				if (ThisSoil.Thickness.Length != 7)
				{
					throw new Exception("Soil layer exception");
				}
			 
				ThisSoil.LL15[0] = 0.06;
				ThisSoil.LL15[1] = 0.11;
				ThisSoil.LL15[2] = 0.21;
				ThisSoil.LL15[3] = 0.18;
				ThisSoil.LL15[4] = 0.23;
				ThisSoil.LL15[5] = 0.30;
				ThisSoil.LL15[6] = 0.26;
				ThisSoil.DUL[0] = 0.25;
				ThisSoil.DUL[1] = 0.26;
				ThisSoil.DUL[2] = 0.30;
				ThisSoil.DUL[3] = 0.27;
				ThisSoil.DUL[4] = 0.34;
				ThisSoil.DUL[5] = 0.27;
				ThisSoil.DUL[6] = 0.30;
				ThisSoil.SAT[0] = 0.34;
				ThisSoil.SAT[1] = 0.34;
				ThisSoil.SAT[2] = 0.34;
				ThisSoil.SAT[3] = 0.34;
				ThisSoil.SAT[4] = 0.34;
				ThisSoil.SAT[5] = 0.34;
				ThisSoil.SAT[6] = 0.34;
				ThisSoil.SoilWater.Reset();
			}   
			if ((IrrFactor == true) && (NitFactor == 0))
			{
				if (ThisSoil.Thickness.Length != 7)
				{
					throw new Exception("Soil layer exception");
				}
			 
				ThisSoil.LL15[0] = 0.13;
				ThisSoil.LL15[1] = 0.21;
				ThisSoil.LL15[2] = 0.25;
				ThisSoil.LL15[3] = 0.19;
				ThisSoil.LL15[4] = 0.29;
				ThisSoil.LL15[5] = 0.32;
				ThisSoil.LL15[6] = 0.34;
				ThisSoil.DUL[0] = 0.31;
				ThisSoil.DUL[1] = 0.28;
				ThisSoil.DUL[2] = 0.30;
				ThisSoil.DUL[3] = 0.28;
				ThisSoil.DUL[4] = 0.29;
				ThisSoil.DUL[5] = 0.34;
				ThisSoil.DUL[6] = 0.30;
				ThisSoil.SAT[0] = 0.34;
				ThisSoil.SAT[1] = 0.34;
				ThisSoil.SAT[2] = 0.34;
				ThisSoil.SAT[3] = 0.34;
				ThisSoil.SAT[4] = 0.34;
				ThisSoil.SAT[5] = 0.34;
				ThisSoil.SAT[6] = 0.34;
				ThisSoil.SoilWater.Reset();
			}   
			if ((IrrFactor == true) && (NitFactor == 50))
			{
				if (ThisSoil.Thickness.Length != 7)
				{
					throw new Exception("Soil layer exception");
				}
			 
				ThisSoil.LL15[0] = 0.14;
				ThisSoil.LL15[1] = 0.21;
				ThisSoil.LL15[2] = 0.27;
				ThisSoil.LL15[3] = 0.27;
				ThisSoil.LL15[4] = 0.27;
				ThisSoil.LL15[5] = 0.32;
				ThisSoil.LL15[6] = 0.30;
				ThisSoil.DUL[0] = 0.31;
				ThisSoil.DUL[1] = 0.28;
				ThisSoil.DUL[2] = 0.30;
				ThisSoil.DUL[3] = 0.28;
				ThisSoil.DUL[4] = 0.29;
				ThisSoil.DUL[5] = 0.34;
				ThisSoil.DUL[6] = 0.30;
				ThisSoil.SAT[0] = 0.34;
				ThisSoil.SAT[1] = 0.34;
				ThisSoil.SAT[2] = 0.34;
				ThisSoil.SAT[3] = 0.34;
				ThisSoil.SAT[4] = 0.34;
				ThisSoil.SAT[5] = 0.34;
				ThisSoil.SAT[6] = 0.34;
				ThisSoil.SoilWater.Reset();
			}
			if ((IrrFactor == true) && (NitFactor == 250))
			{
				if (ThisSoil.Thickness.Length != 7)
				{
					throw new Exception("Soil layer exception");
				}
			 
				ThisSoil.LL15[0] = 0.12;
				ThisSoil.LL15[1] = 0.18;
				ThisSoil.LL15[2] = 0.17;
				ThisSoil.LL15[3] = 0.20;
				ThisSoil.LL15[4] = 0.27;
				ThisSoil.LL15[5] = 0.27;
				ThisSoil.LL15[6] = 0.21;
				ThisSoil.DUL[0] = 0.31;
				ThisSoil.DUL[1] = 0.28;
				ThisSoil.DUL[2] = 0.30;
				ThisSoil.DUL[3] = 0.28;
				ThisSoil.DUL[4] = 0.29;
				ThisSoil.DUL[5] = 0.34;
				ThisSoil.DUL[6] = 0.30;
				ThisSoil.SAT[0] = 0.34;
				ThisSoil.SAT[1] = 0.34;
				ThisSoil.SAT[2] = 0.34;
				ThisSoil.SAT[3] = 0.34;
				ThisSoil.SAT[4] = 0.34;
				ThisSoil.SAT[5] = 0.34;
				ThisSoil.SAT[6] = 0.34;
				ThisSoil.SoilWater.Reset();
			}
		}

		[EventSubscribe("Commencing")]
		private void OnSimulationCommencing(object sender, EventArgs e)
		{
			SetSoilLayers();
		}
		
		[EventSubscribe("DoManagement")]
		private void OnDoManagement(object sender, EventArgs e)
		{
			//Specific irrgations
			if ((IrrFactor == true) && (NitFactor == 250))
			{
				if ((DateUtilities.CompareDates("17-Dec", Clock.Today) == 0))
					Irrigation.Apply(39.7);
				if ((DateUtilities.CompareDates("21-Jan", Clock.Today) == 0))
					Irrigation.Apply(20.1);
			}
			//fertigation event	
			if ((DateUtilities.CompareDates("19-Nov", Clock.Today) == 0))
			{
				if ((IrrFactor == true))
					Irrigation.Apply(24);
				else
				{
					Irrigation.Apply(20);
/*					if (NitFactor == 0)
						Irrigation.Apply(20);
					if (NitFactor == 50)
						Irrigation.Apply(10);
					if (NitFactor == 250)
						Irrigation.Apply(20);*/
				}
	    
			}
	
			
		}
	}
		
		
}
```
            Manager WheatExtraVariables
```csharp
using System;
using Models.Core;
using System.Collections.Generic;
using System.Text;
using Models.Soils;
using Models.PMF;
using Models;
using System.Xml.Serialization;
using APSIM.Shared.Utilities;

namespace Models
{
	[Serializable] 
	public class Script : Model
	{
		[Link] Clock Clock;
		[Link] Soils.Soil Soil;
		[Link] Models.SurfaceOM.SurfaceOrganicMatter SOM;
		[Link] Weather Met;
		[Link] Fertiliser Fert;
		[Link] Irrigation Irrig;
		[Link] Plant Wheat;
		[Link] Zone zone;
					
		[XmlIgnore] public bool InitialDay { get; set; }
		
		[XmlIgnore] public double AccumPlantN { get; set; }
		[XmlIgnore] public double AccumMineralisation { get; set; }
		[XmlIgnore] public double AccumDenit { get; set; }
		[XmlIgnore] public double AccumFert { get; set; }
		[XmlIgnore] public double AccumLeach { get; set; }
		[XmlIgnore] public double AccumDetach { get; set; }
		[XmlIgnore] public double DeltaSoilOMN { get; set; }
		[XmlIgnore] public double DeltaSurfaceOMN { get; set; }
		[XmlIgnore] public double DeltaSoilMineralN { get; set; }
		[XmlIgnore] public double SoilNitrogenContent { get; set; }
		
		[XmlIgnore] public double AccumEO { get; set; }
		[XmlIgnore] public double AccumEP { get; set; }
		[XmlIgnore] public double AccumES { get; set; }
		[XmlIgnore] public double AccumDrainage { get; set; }
		[XmlIgnore] public double AccumRunoff { get; set; }
		[XmlIgnore] public double AccumOutflowLat { get; set; }
		[XmlIgnore] public double AccumIrrigation { get; set; }
		[XmlIgnore] public double AccumRainfall { get; set; }
		[XmlIgnore] public double SoilWaterDeficit { get; set; }
	
		[XmlIgnore] public double  InitialSoilOMN { get; set; }
		[XmlIgnore] public double  InitialSurfaceOMN { get; set; }
		[XmlIgnore] public double  InitialMineralN { get; set; }
		
		[XmlIgnore] public double SWC { get; set; }
		[XmlIgnore] public double DUL { get; set; }
		[XmlIgnore] public double OutFlowLat { get; set; }

		[XmlIgnore] public double FomN { get; set; }
		[XmlIgnore] public double BiomN { get; set; }
		[XmlIgnore] public double HumN { get; set; }
		[XmlIgnore] public double OrganicN { get; set; }
		[XmlIgnore] public double NO3N { get; set; }
		[XmlIgnore] public double NH4N { get; set; }
		[XmlIgnore] public double UreaN { get; set; }
		[XmlIgnore] public double MineralN { get; set; }
		[XmlIgnore] public double DltNMinRes { get; set; }
		[XmlIgnore] public double DltNMinTot { get; set; }
		
		[XmlIgnore] public double LeafExpandedPosition { get; set; }
		[XmlIgnore] public double LeafAppearedPosition { get; set; }
		[XmlIgnore] public double ExpandedLeafNoYesterday { get; set; }
		[XmlIgnore] public double AppearedLeafNoYesterday { get; set; }
		[XmlIgnore] public double MostRecentlyExpandedLeafSize { get; set; }
		[XmlIgnore] public double MostRecentlyAppearedLeafMaxSize { get; set; }
        
		[EventSubscribe("Commencing")]
		private void OnSimulationCommencing(object sender, EventArgs e)
		{
			InitialDay = true;
			LeafExpandedPosition = 0;
			LeafAppearedPosition = 0;
			ExpandedLeafNoYesterday = 0;
			AppearedLeafNoYesterday = 0;
			MostRecentlyExpandedLeafSize = 0;
			MostRecentlyAppearedLeafMaxSize = 0;
		}
		
		[EventSubscribe("DoManagement")]
		private void OnDoManagement(object sender, EventArgs e)
		{
			//!!!!!! Nitrogen balance components !!!!!!
			//!!!!!!^^^^^^^^^^^^^^^^^^^^^^^^^^^^^!!!!!!
			FomN = MathUtilities.Sum(Soil.SoilNitrogen.FOMN);
			HumN = MathUtilities.Sum(Soil.SoilNitrogen.HumicN);
			BiomN = MathUtilities.Sum(Soil.SoilNitrogen.MicrobialN);
			OrganicN = FomN + HumN + BiomN;
			NO3N = MathUtilities.Sum(Soil.NO3N);
			NH4N = MathUtilities.Sum(Soil.NH4N);
			UreaN = MathUtilities.Sum(Soil.SoilNitrogen.urea);
			MineralN = NO3N + NH4N + UreaN; 
			DltNMinRes = MathUtilities.Sum(Soil.SoilNitrogen.dlt_n_min_res);
			DltNMinTot = MathUtilities.Sum(Soil.SoilNitrogen.MineralisedN);
			int layers = Soil.Thickness.Length;
			if (InitialDay == true)
			{
				InitialSurfaceOMN = SOM.N;
				InitialSoilOMN = OrganicN;
				InitialMineralN = MineralN;
				InitialDay = false;
			}
			AccumFert += Fert.NitrogenApplied;
			DeltaSurfaceOMN = SOM.N - InitialSurfaceOMN;
			AccumLeach = AccumLeach - Soil.SoilWater.LeachNH4 - Soil.SoilWater.LeachNO3 - Soil.SoilWater.LeachUrea; //Fails
			AccumMineralisation += MathUtilities.Sum(Soil.SoilNitrogen.MineralisedN);
			AccumDenit -= MathUtilities.Sum(Soil.SoilNitrogen.Denitrification);
			AccumPlantN -= (double)zone.Get("Wheat.Root.NUptake");
			DeltaSoilOMN = OrganicN - InitialSoilOMN;
			DeltaSoilMineralN = MineralN - InitialMineralN;
			SoilNitrogenContent = MineralN;
			
			//!!!!!! Water balance components !!!!!!
			//!!!!!!^^^^^^^^^^^^^^^^^^^^^^^^^^!!!!!!

			AccumIrrigation += Irrig.IrrigationApplied;
			AccumRainfall += Met.Rain;
			//AccumEP -= (double)zone.Get("[Wheat].Leaf.Transpiration");
			AccumEP -= (double)zone.Get("Wheat.Root.WaterUptake");
			SoilWaterDeficit = (SWC - DUL);
			double OutFlowLat = MathUtilities.Sum(Soil.SoilWater.outflow_lat);
			AccumOutflowLat -= OutFlowLat;
			
			//Leaf number variable
			ExpandedLeafNoYesterday = (double)zone.Get("Wheat.Leaf.ExpandedCohortNo");
			AppearedLeafNoYesterday = (double)zone.Get("Wheat.Leaf.AppearedCohortNo");
		}
		
		[EventSubscribe("DoManagementCalculations")]
		private void OnDoManagementCalculations(object sender, EventArgs e)
		{
			FomN = MathUtilities.Sum(Soil.SoilNitrogen.FOMN);
			HumN = MathUtilities.Sum(Soil.SoilNitrogen.HumicN);
			BiomN = MathUtilities.Sum(Soil.SoilNitrogen.MicrobialN);
			
			
			AccumEO -= Soil.SoilWater.Eo;
			AccumES -= Soil.SoilWater.Es; 
			AccumDrainage -= Soil.SoilWater.Drainage;
			AccumRunoff -= Soil.SoilWater.Runoff;
			SWC = MathUtilities.Sum(Soil.SoilWater.SWmm);
			DUL = MathUtilities.Sum(Soil.SoilWater.DULmm);
			
			if ((double)zone.Get("Wheat.Leaf.ExpandedCohortNo") > ExpandedLeafNoYesterday)
			{
				LeafExpandedPosition = (double)zone.Get("Wheat.Leaf.ExpandedCohortNo");
				MostRecentlyExpandedLeafSize = (double)zone.Get("Wheat.Leaf.CohortSize[" + (int)LeafExpandedPosition + "]");
			}
			//else
			//	LeafExpandedPosition = 0;
			
			if ((double)zone.Get("Wheat.Leaf.AppearedCohortNo") > AppearedLeafNoYesterday)
			{
				LeafAppearedPosition = (double)zone.Get("Wheat.Leaf.AppearedCohortNo");
				MostRecentlyAppearedLeafMaxSize = (double)zone.Get("Wheat.Leaf.CohortParameters.MaxArea.Value()");
			}
			//else
			//LeafAppearedPosition = 0;
			
		}
	}
}
```
            SoluteManager
    Memo Combined Results
      ### Combined Results
      Simulation results for the combined datasets from the various countries are shown in the following graphs.  The model is able to adequately capture the influence of growing conditions (soil, climate) and management (population, Nitrogen, irrigation, sowing date).
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