Simulations: Version=1
  Replacements
    Plant Slurp: CropType=Slurp
      Memo Introduction
        # Slurp

        ## Author:

        Hamish Browni, Plant and Food Research, New Zealand

        Slurp is the sound a plant makes when it extracts water from the soil.  Slurp is a static plant model with a minimal amount of functionality needed for water and nitrogen balance modelling.  It has a root organ the will extract water and nitrogen from the soil and a leaf organ that intercepts radiation and demands Nitrogen and water.  While the properties of this model are static, they can be changed from manager scripts enabling coare changes in the crop to be modeled
      Cultivar StaticCrop: Alias=StaticCrop
      OrganArbitrator Arbitrator: NArbitrationOption=PriorityThenRelativeAllocation; DMArbitrationOption=RelativeAllocation
      Root: InitialDM=50; SpecificRootLength=40000; KNO3_yProperty=[0.02, 0.02]; KNO3_xRootLength=[0, 0.003]; KNH4_yProperty=[0, 0]; KNH4_xRootLength=[0, 0.003]; NuptakeSupply=0
        Memo description
          The root only has a few parameters set which may be set from manager scripts to alter the potential water and nutrient uptake from the crop
        CompositeBiomass Live: Propertys=[[Root].LayerLive]
        CompositeBiomass Dead: Propertys=[[Root].LayerDead]
        Constant NitrogenDemandSwitch: Value=1
          Memo description
            This is a multiplier of nitrogen demand so can be set to 0 to turn potential N uptake off and to 1 to turn uptake on.  Values in between are possible also
        Constant RootFrontVelocity: Value=0
          Memo description
            The speed that roots proceed down through the profile.  Default is 0 and root depth is determined by the depth that the crop is sown at i.e at sowing roots are initialised down to sowing depth
        Constant MaxDailyNUptake: Value=6
          Memo description
            Set a limit to the amount of N that a crop can take up each day.  Value is g/m2
        LinearInterpolationFunction KLModifier: XProperty=[Root].LayerMidPointDepth
          XYPairs: X=[0, 200, 1500]; Y=[1, 1, 0]
          Memo Description
            This is a function of rooting depth so can be changed through time to represent root dynamic and differences between root systems of different crops
      SimpleLeaf Leaf
        zero: BiomassYesterday, LAI, Height, FRGR, PotentialEP, K, KDead, DeltaBiomass, LAIDead, WaterAllocation
        Biomass Live
        Biomass Dead
        Constant FRGRFunction: Value=1
        Constant PotentialBiomass: Value=5
        PartitionFractionDemandFunction DMDemandFunction
          Constant PartitionFraction: Value=1
        Constant NConc: Value=0.05
        Constant LAIFunction: Value=5
        Constant ExtinctionCoefficientFunction: Value=0.7
        Constant HeightFunction: Value=150
        Constant StructuralFraction: Value=0.5
  DataStore
    ExcelInput Observed: FileName=%root%\Tests\SoilWater\ShallowSoilTest\SoilWaterContent.xls; SheetNames=[ProfileSWC]
    ExcelInput Observed1: FileName=%root%\Tests\SoilWater\ShallowSoilTest\SoilWaterContent.xls; SheetNames=[LayerSWC]
    ExcelInput Observed11: FileName=%root%\Tests\SoilWater\ShallowSoilTest\CoverDataObs.xls; SheetNames=[Cover]
  Experiment LandP
    Factors
      Factor Treatment
        Factor LucerneTwoPerWeek
          Specifications:
            [PMFSlurpSowingRule].Script.SowingDate=2011-03-10
            [SetLAIofCrop].Script.Column = 0
            [IrrigationEvents]
          Operations IrrigationEvents
            2011-11-07  [Irrigation].Apply(30);
            2011-11-25  [Irrigation].Apply(13.6);
            2011-11-28  [Irrigation].Apply(20.1);
            2011-11-29  [Irrigation].Apply(16.4);
            2011-12-05  [Irrigation].Apply(27);
            2011-12-15  [Irrigation].Apply(8);
            2011-12-26  [Irrigation].Apply(22.5);
            2011-12-29  [Irrigation].Apply(16.5);
            2012-01-05  [Irrigation].Apply(22.8);
            2012-01-09  [Irrigation].Apply(17.8);
            2012-01-12  [Irrigation].Apply(9.1);
            2012-01-16  [Irrigation].Apply(18.3);
            2012-01-19  [Irrigation].Apply(18.6);
            2012-01-23  [Irrigation].Apply(22.5);
            2012-01-30  [Irrigation].Apply(8);
            2012-02-02  [Irrigation].Apply(12);
            2012-02-07  [Irrigation].Apply(16.5);
            2012-02-09  [Irrigation].Apply(13.3);
            2012-02-13  [Irrigation].Apply(12.2);
            2012-02-20  [Irrigation].Apply(13.3);
            2012-02-23  [Irrigation].Apply(8.8);
            2012-03-29  [Irrigation].Apply(10);
            2012-04-02  [Irrigation].Apply(6.5);
            2012-04-05  [Irrigation].Apply(5);
            2012-04-10  [Irrigation].Apply(6.9);
            2012-04-26  [Irrigation].Apply(4.6);
            2012-04-30  [Irrigation].Apply(6.9);
            2012-05-03  [Irrigation].Apply(3.2);
            2012-11-01  [Irrigation].Apply(18);
            2012-11-15  [Irrigation].Apply(12);
            2012-11-22  [Irrigation].Apply(12);
            2012-11-26  [Irrigation].Apply(12);
            2012-11-29  [Irrigation].Apply(12);
            2012-12-03  [Irrigation].Apply(6);
            2012-12-06  [Irrigation].Apply(12);
            2012-12-13  [Irrigation].Apply(12);
            2012-12-17  [Irrigation].Apply(20.8);
            2012-12-20  [Irrigation].Apply(12);
            2012-12-24  [Irrigation].Apply(12);
            2012-12-27  [Irrigation].Apply(9);
            2012-12-31  [Irrigation].Apply(12);
            2013-01-03  [Irrigation].Apply(12);
            2013-01-07  [Irrigation].Apply(18);
            2013-01-10  [Irrigation].Apply(18);
            2013-01-14  [Irrigation].Apply(21);
            2013-01-21  [Irrigation].Apply(15);
            2013-01-24  [Irrigation].Apply(15);
            2013-01-28  [Irrigation].Apply(15);
            2013-01-31  [Irrigation].Apply(15);
            2013-02-04  [Irrigation].Apply(18);
            2013-02-07  [Irrigation].Apply(6);
            2013-02-11  [Irrigation].Apply(18.7);
            2013-02-14  [Irrigation].Apply(13.5);
            2013-02-18  [Irrigation].Apply(15);
            2013-02-21  [Irrigation].Apply(15);
            2013-02-25  [Irrigation].Apply(15);
            2013-02-28  [Irrigation].Apply(32);
            2013-03-07  [Irrigation].Apply(12);
            2013-03-11  [Irrigation].Apply(9);
            2013-03-14  [Irrigation].Apply(9);
            2013-03-28  [Irrigation].Apply(18);
            2013-04-04  [Irrigation].Apply(9);
            2013-04-11  [Irrigation].Apply(9);
            2013-10-24  [Irrigation].Apply(9);
            2013-10-31  [Irrigation].Apply(15);
            2013-11-04  [Irrigation].Apply(6);
            2013-11-07  [Irrigation].Apply(9);
            2013-11-11  [Irrigation].Apply(9);
            2013-11-14  [Irrigation].Apply(9);
            2013-11-18  [Irrigation].Apply(12);
            2013-11-21  [Irrigation].Apply(12);
            2013-11-25  [Irrigation].Apply(9);
            2013-12-02  [Irrigation].Apply(9);
            2013-12-05  [Irrigation].Apply(12);
            2013-12-09  [Irrigation].Apply(6);
            2013-12-12  [Irrigation].Apply(11);
            2013-12-17  [Irrigation].Apply(15);
            2013-12-23  [Irrigation].Apply(7);
            2014-01-06  [Irrigation].Apply(14);
            2014-01-09  [Irrigation].Apply(12.6);
            2014-01-13  [Irrigation].Apply(15.7);
            2014-01-16  [Irrigation].Apply(14.7);
            2014-01-20  [Irrigation].Apply(17.5);
            2014-01-23  [Irrigation].Apply(7.5);
            2014-01-30  [Irrigation].Apply(10);
            2014-02-03  [Irrigation].Apply(12);
            2014-02-05  [Irrigation].Apply(10);
            2014-02-10  [Irrigation].Apply(9);
            2014-02-17  [Irrigation].Apply(10);
            2014-02-20  [Irrigation].Apply(10);
        Factor LucerneOnePerWeek
          Specifications:
            [PMFSlurpSowingRule].Script.SowingDate=2011-03-10
            [SetLAIofCrop].Script.Column = 1
            [IrrigationEvents]
          Operations IrrigationEvents
            2011-11-07  [Irrigation].Apply(30);
            2011-11-25  [Irrigation].Apply(13.6);
            2011-11-29  [Irrigation].Apply(36.5);
            2011-12-15  [Irrigation].Apply(34.9);
            2011-12-29  [Irrigation].Apply(41.8);
            2012-01-05  [Irrigation].Apply(22.8);
            2012-01-12  [Irrigation].Apply(26.9);
            2012-01-19  [Irrigation].Apply(36.8);
            2012-02-02  [Irrigation].Apply(19.8);
            2012-02-09  [Irrigation].Apply(30);
            2012-02-16  [Irrigation].Apply(13);
            2012-02-23  [Irrigation].Apply(14.3);
            2012-03-29  [Irrigation].Apply(10);
            2012-04-05  [Irrigation].Apply(11.4);
            2012-04-26  [Irrigation].Apply(11.5);
            2012-05-03  [Irrigation].Apply(10.1);
            2012-11-01  [Irrigation].Apply(18);
            2012-11-15  [Irrigation].Apply(12);
            2012-11-29  [Irrigation].Apply(24);
            2012-12-13  [Irrigation].Apply(21);
            2012-12-27  [Irrigation].Apply(33);
            2013-01-10  [Irrigation].Apply(42);
            2013-01-24  [Irrigation].Apply(39);
            2013-02-07  [Irrigation].Apply(30);
            2013-02-21  [Irrigation].Apply(42);
            2013-02-28  [Irrigation].Apply(20);
            2013-03-07  [Irrigation].Apply(30);
            2013-04-04  [Irrigation].Apply(27);
            2013-04-18  [Irrigation].Apply(15);
            2013-10-24  [Irrigation].Apply(12);
            2013-11-07  [Irrigation].Apply(24);
            2013-11-21  [Irrigation].Apply(33);
            2013-12-05  [Irrigation].Apply(30);
            2013-12-19  [Irrigation].Apply(17);
            2014-01-02  [Irrigation].Apply(12.7);
            2014-01-16  [Irrigation].Apply(40.9);
            2014-01-30  [Irrigation].Apply(35);
            2014-02-13  [Irrigation].Apply(25);
            2014-02-27  [Irrigation].Apply(32);
        Factor LucerneThreeWeekly
          Specifications:
            [PMFSlurpSowingRule].Script.SowingDate=2011-03-10
            [SetLAIofCrop].Script.Column = 2
            [IrrigationEvents]
          Operations IrrigationEvents
            2011-11-07  [Irrigation].Apply(30);
            2011-11-29  [Irrigation].Apply(47.6);
            2011-12-15  [Irrigation].Apply(34.9);
            2011-12-29  [Irrigation].Apply(41.8);
            2012-01-12  [Irrigation].Apply(49.8);
            2012-01-26  [Irrigation].Apply(36.8);
            2012-02-09  [Irrigation].Apply(49.6);
            2012-02-23  [Irrigation].Apply(34.3);
            2012-04-05  [Irrigation].Apply(21.4);
            2012-05-03  [Irrigation].Apply(23.7);
            2012-11-01  [Irrigation].Apply(18);
            2012-11-22  [Irrigation].Apply(12);
            2012-12-13  [Irrigation].Apply(27);
            2013-01-03  [Irrigation].Apply(42);
            2013-01-24  [Irrigation].Apply(45);
            2013-02-14  [Irrigation].Apply(90.6);
            2013-02-28  [Irrigation].Apply(20);
            2013-03-07  [Irrigation].Apply(30);
            2013-03-28  [Irrigation].Apply(18);
            2013-04-18  [Irrigation].Apply(15);
            2013-10-24  [Irrigation].Apply(12);
            2013-11-14  [Irrigation].Apply(33);
            2013-12-05  [Irrigation].Apply(36);
            2014-01-16  [Irrigation].Apply(44.7);
            2014-02-05  [Irrigation].Apply(33.5);
            2014-02-27  [Irrigation].Apply(32);
        Factor LucerneNone
          Specifications:
            [PMFSlurpSowingRule].Script.SowingDate=2011-03-10
            [SetLAIofCrop].Script.Column = 3
            [IrrigationEvents]
          Operations IrrigationEvents
            2013-02-28  [Irrigation].Apply(20);
        Factor PastureTwoPerWeek
          Specifications:
            [PMFSlurpSowingRule].Script.SowingDate=2011-03-24
            [SetLAIofCrop].Script.Column = 4
            [IrrigationEvents]
            [Soil].Water
          Operations IrrigationEvents: same as LandP.Factors.Treatment.LucerneTwoPerWeek.IrrigationEvents
          Water
            Thickness  BD   AirDry  LL15  DUL   SAT
            150        1.2  0.05    0.1   0.33  0.5
            150        1.2  0.1     0.1   0.33  0.5
            100        1.2  0.12    0.12  0.37  0.44
            200        1.2  0.06    0.06  0.28  0.46
            200        1.2  0.04    0.04  0.13  0.44
            200        1.2  0.02    0.02  0.06  0.44
            200        1.2  0.06    0.06  0.15  0.46
            200        1.2  0.04    0.04  0.1   0.44
            200        1.2  0.06    0.06  0.13  0.44
            SoilCrop PMFSlurpSoil: LL=[0.1, 0.1, 0.12, 0.06, 0.04, 0.02, 0.06, 0.04, 0.06]; KL=[0.06, 0.06, 0.06, 0.06, 0.06, 0.06, 0.06, 0.06, 0.06]; XF=[1, 1, 1, 1, 1, 1, 1, 1, 1]
        Factor PastureOncePerWeek
          Specifications:
            [PMFSlurpSowingRule].Script.SowingDate=2011-03-24
            [SetLAIofCrop].Script.Column = 5
            [IrrigationEvents]
          Operations IrrigationEvents: same as LandP.Factors.Treatment.LucerneOnePerWeek.IrrigationEvents
        Factor PastureThreeWeekly
          Specifications:
            [PMFSlurpSowingRule].Script.SowingDate=2011-03-24
            [SetLAIofCrop].Script.Column = 6
            [IrrigationEvents]
          Operations IrrigationEvents: same as LandP.Factors.Treatment.LucerneThreeWeekly.IrrigationEvents
        Factor PastureNone
          Specifications:
            [PMFSlurpSowingRule].Script.SowingDate=2011-03-24
            [SetLAIofCrop].Script.Column = 7
            [IrrigationEvents]
          Operations IrrigationEvents
            2013-02-28  [Irrigation].Apply(20);
    Simulation LandPBase: Area=0; Slope=0
      Weather: FileName=%root%\Examples\WeatherFiles\lincoln.met
      Clock: StartDate=2011-03-01; EndDate=2014-05-01
      Summary
      SoilArbitrator Soil Arbitrator
      Zone Field: Area=0; Slope=0
        Soil: Latitude=0; Longitude=0
          Analysis: Thickness=[100, 200, 300, 300, 300, 300]; PH=[6.6, 6.2, 5.7, 5.5, 5.5, 5.5]; PHUnits=Water; BoronUnits=HotWater
          InitialWater Initial water: PercentMethod=EvenlyDistributed; FractionFull=1
          Water
            Thickness  BD   AirDry  LL15  DUL   SAT
            150        1.2  0.05    0.1   0.33  0.5
            150        1.2  0.1     0.1   0.33  0.5
            100        1.2  0.12    0.12  0.31  0.44
            200        1.2  0.06    0.06  0.15  0.46
            200        1.2  0.04    0.04  0.1   0.44
            200        1.2  0.02    0.02  0.06  0.44
            200        1.2  0.06    0.06  0.15  0.46
            200        1.2  0.04    0.04  0.1   0.44
            200        1.2  0.06    0.06  0.13  0.44
            SoilCrop PMFSlurpSoil: LL=[0.1, 0.1, 0.12, 0.06, 0.04, 0.02, 0.06, 0.04, 0.06]; KL=[0.06, 0.06, 0.06, 0.06, 0.06, 0.06, 0.06, 0.06, 0.06]; XF=[1, 1, 1, 1, 1, 1, 1, 1, 1]
          SoilWater: residueinterception=0; SummerDate=1-Nov; SummerU=9; SummerCona=4.4; WinterDate=1-Apr; WinterU=9; WinterCona=4.4; DiffusConst=88; DiffusSlope=35.4; Salb=0.18; CN2Bare=68; CNRed=20; CNCov=0.8; slope=0; discharge_width=0; catchment_area=0; max_pond=0
            Thickness  SWCON  KLAT
            150        0.55   0
            150        0.55   0
            100        0.55   0
            200        0.55   0
            200        0.55   0
            200        0.55   0
            200        0.55   0
            200        0.55   0
            200        0.55   0
          SoilNitrogen: fom_type=[default, manure, mucuna, lablab, shemp, stable]; fract_carb=[0.2, 0.3, 0.54, 0.57, 0.45, 0]; fract_cell=[0.7, 0.3, 0.37, 0.37, 0.47, 0.1]; fract_lign=[0.1, 0.4, 0.09, 0.06, 0.08, 0.9]; wfpsN2N2O_x=[22, 88]; wfpsN2N2O_y=[0.1, 1]; oc=[1.83566, 1.46334, 1.19884, 1.0301, 0.470338, 0.470138]
          SoilOrganicMatter: RootCN=30; RootWt=3000; SoilCN=11.5; EnrACoeff=7.4; EnrBCoeff=0.2; OCUnits=Total
            Thickness  OC    FBiom  FInert
            100        1.82  0.025  0.3
            200        1.47  0.025  0.4
            300        1.2   0.015  0.75
            300        1.03  0.01   0.9
            300        0.47  0.01   0.96
            300        0.47  0.01   0.96
          Sample Initial nitrogen: NO3Units=kgha; NH4Units=ppm; SWUnits=Volumetric; OCUnits=Total; PHUnits=Water
            Thickness  NO3  NH4
            100        217  0
            200        30   0
            300        5    0
            300        5    0
            300        0    0
            300        0    0
        Plant PMFSlurp: ResourceName=Slurp; CropType=Slurp
        MicroClimate: air_pressure=1010; soil_emissivity=0.96; sun_angle=15; soil_heat_flux_fraction=0.4; night_interception_fraction=0.5; windspeed_default=3; refheight=2; albedo=0.26; emissivity=0.96; gsmax=0.01; r50=200; a_interception=0; b_interception=1; c_interception=0; d_interception=0; soil_albedo=0.23
        Irrigation
        Fertiliser
        SurfaceOrganicMatter surface organic matter: PondActive=no; ReportAdditions=no; ReportRemovals=no; PoolName=wheat; type=wheat; mass=2000; standing_fraction=0; cnr=80; CriticalResidueWeight=2000; OptimumDecompTemp=20; MaxCumulativeEOS=20; CNRatioDecompCoeff=0.277; CNRatioDecompThreshold=25; TotalLeachRain=25; MinRainToLeach=10; CriticalMinimumOrganicC=0.004; DefaultCPRatio=0; DefaultStandingFraction=0; StandingExtinctCoeff=0.5; FractionFaecesAdded=0.5
          Pools:
            {PoolName=wheat, ResidueType=wheat, Mass=2000, CNRatio=80, StandingFraction=0}
          ResidueTypes: LoadFromResource=ResidueTypes
          TillageTypes TillageTypesList
        Operations IrrigationEvents
          1998-10-02  [Irrigation].Apply(40);
          1998-10-26  [Irrigation].Apply(70);
          1998-12-15  [Irrigation].Apply(70);
          1998-12-29  [Irrigation].Apply(10);
          1998-12-30  [Irrigation].Apply(55);
          1999-01-07  [Irrigation].Apply(50);
          1999-01-21  [Irrigation].Apply(40);
          1999-02-10  [Irrigation].Apply(28);
          1999-02-19  [Irrigation].Apply(15);
          1999-03-09  [Irrigation].Apply(25);
          1998-12-29  [Fertiliser].Apply(150, Fertiliser.Types.UreaN, 10);
          2011-11-07  [Irrigation].Apply(30);
          2011-11-25  [Irrigation].Apply(13.6);
          2011-11-28  [Irrigation].Apply(20.1);
        Manager ExtraVariables
```csharp
using System;
using Models.Core;
using System.Collections.Generic;
using System.Text;
using Models.Soils;
using Models.PMF;
using Models;
using System.Xml.Serialization;
using APSIM.Shared.Utilities;

namespace Models
{
	[Serializable] 
	public class Script : Model
	{      
		[Link] Clock Clock;
		[Link] Soils.Soil Soil;
		[Link] Models.SurfaceOM.SurfaceOrganicMatter SOM;
		[Link] Weather Met;   
		[Link] Fertiliser Fert;
		[Link] Irrigation Irrig;  
		[Link] Plant PMFSlurp;
        [Link] Zone zone;
					
		[XmlIgnore] public bool InitialDay { get; set; }
	
		
		[XmlIgnore] public double AccumEO { get; set; }
		[XmlIgnore] public double AccumEP { get; set; }
		[XmlIgnore] public double AccumES { get; set; }
		[XmlIgnore] public double AccumDrainage { get; set; }
		[XmlIgnore] public double AccumRunoff { get; set; }
		[XmlIgnore] public double AccumOutflowLat { get; set; }
		[XmlIgnore] public double AccumIrrigation { get; set; }
		[XmlIgnore] public double AccumRainfall { get; set; }
		[XmlIgnore] public double SoilWaterDeficit { get; set; }
	
		[XmlIgnore] public double SWC { get; set; }
		[XmlIgnore] public double DUL { get; set; }
		[XmlIgnore] public double OutFlowLat { get; set; }

        [EventSubscribe("Commencing")]
        private void OnSimulationCommencing(object sender, EventArgs e)
        {
			InitialDay = true;
		}	   
		
		[EventSubscribe("DoManagement")]
		private void OnDoManagement(object sender, EventArgs e)
		{
			//!!!!!! Water balance components !!!!!!
			//!!!!!!^^^^^^^^^^^^^^^^^^^^^^^^^^!!!!!!

			AccumIrrigation += Irrig.IrrigationApplied;
			AccumRainfall += Met.Rain;
            AccumEP -= (double)zone.Get("PMFSlurp.Root.WaterUptake");
			SoilWaterDeficit =  (SWC - DUL);
			double OutFlowLat = MathUtilities.Sum(Soil.SoilWater.outflow_lat);
			AccumOutflowLat -= OutFlowLat;
		}
		
		[EventSubscribe("DoManagementCalculations")]
		private void OnDoManagementCalculations(object sender, EventArgs e)
		{
			AccumEO -= Soil.SoilWater.Eo;
			AccumES -= Soil.SoilWater.Es; 
			AccumDrainage -= Soil.SoilWater.Drainage;
			AccumRunoff -= Soil.SoilWater.Runoff;
			SWC = MathUtilities.Sum(Soil.SoilWater.SWmm);
			DUL = MathUtilities.Sum(Soil.SoilWater.DULmm);
		}
	}
}
```
        Manager PMFSlurpSowingRule
          CultivarName = StaticCrop
          InitialRootDepth = 1500
          SowingDate = 2011-03-14
```csharp
        using System;
        using Models.Core;
        using Models.PMF;
        using APSIM.Shared.Utilities;
        
        namespace Models
        {
           [Serializable] 
           [System.Xml.Serialization.XmlInclude(typeof(Model))]
            public class Script : Model
            {      
               [Link] Plant PMFSlurp;
               [Link] Clock Clock;

               [Description("Cultivar")]
               public string CultivarName { get; set; }
               [Description("Initial Root Depth")]
               public double InitialRootDepth { get; set; }
			   [Description("Sowing Date")]
               public DateTime SowingDate { get; set; }

               
               [EventSubscribe("DoManagement")]
               private void OnDoManagement(object sender, EventArgs e)
               {
				if (Clock.Today.Date == SowingDate)
                    PMFSlurp.Sow(cultivar:CultivarName, population:1, depth:InitialRootDepth, rowSpacing:150);
                //Potato.Sow(... Contains the following arguements:
                //Population  double  Optional  Seeds sowing/m2.  Default is zero
                //Cultivar    string  Required  "NameOfCultivar"
                //Depth       double  Optional  Depth (mm) seed sown.   Default is 100mm 
                //MaxCover    double  Optional  Proportion (0-1) of the ground row crop will cover.   Default is 1.0
                //BudNumber   double  Optional  Number of mainstems per seed sown.  Default is 1.0
                //RowSpacing  double  Optional  Spaceing (mm) between drill rows when crop is sown.  Default is 150mm
                //CropClass   string  Optional  Crop class to instantiate when crop is sown.  Default is "Plant"
			   }
            }
        }
```
        Manager SetLAIofCrop
          CoverFile = CoverInterpolated.csv
          Column = 0
          Ext_coef = 0.8
          OverRidePath = PMFSlurp.Leaf.LAIFunction.value
          CoverToday = 0
          leaflai = 0
```csharp
using System;
using Models.Core;
using System.Collections.Generic;
using System.Text;
using Models.PMF;
using Models;
using System.Xml.Serialization;
using APSIM.Shared.Utilities;
using System.IO;
	  

namespace Models
{
[Serializable] 
public class Script : Model
{     
	[Link] Clock Clock;
	[Link] Zone zone;
	[Link] Simulation simulation;
   
	[Description("File of covers to load")]
	public string CoverFile { get; set; }
	[Description("Column to load, 0 based excluding date column")]
	public  int Column { get; set; }
	[Description("Extinction coefficient")]
	public  double Ext_coef { get; set; }
    [Description("Path for coefficient to be Overwritten")]
	public string OverRidePath { get; set; }
   
    CoverIntcs CoverVals;
   
    public double CoverToday { get; private set; }
    public double leaflai { get; private set; }
    int Col;
    string CF;
   
    public class CDateValues
    {
       public   DateTime DT = new DateTime();
       public   double[] Values = new double[8];
    }

    public class CoverIntcs
    {
    	public List<CDateValues> CLS = new List<CDateValues>(); 

        public double GetCover(DateTime dt, int C)
        {
        	foreach(CDateValues CDV in CLS)
            {
            	double k = CDV.Values[C];  
            	if (CDV.DT.Date == dt.Date)
                return k;
            }
            return 0;
        }
      
        public void LoadFile(string CF)
        {
     	   StreamReader infile = new StreamReader(CF);
           string S = infile.ReadToEnd();
           string[] elements = S.Split('\n');
           int L = 0;
           foreach (string line in elements)
           {
           		L++;
            	if (L < 2) continue; //skip first 1 lines

            	string [] StrVals = line.Split(',');
            	CDateValues CL = new CDateValues();
            	try
            	{
               		CL.DT = Convert.ToDateTime(StrVals[0]);
            	}
            	catch (Exception E)
            	{
               	//Probaly extra lines at end lets just 
               	break;
            	}

            for (int l = 1; l < StrVals.Length; l++)
            {
               CL.Values[l - 1] = Convert.ToDouble(StrVals[l]);
            }
            CLS.Add(CL);
 		}
 	}
 }
 
 [EventSubscribe("StartOfSimulation")]
 private void OnStartOfSimulation(object sender, EventArgs e)
 {
 	//CoverVals = new CoverIntcs();
    //CoverVals.LoadFile(CoverFile);
	CoverVals = new CoverIntcs();
	string fullPath = PathUtilities.GetAbsolutePath(CoverFile, simulation.FileName);
	CoverVals.LoadFile(fullPath);

 }
      
 [EventSubscribe("StartOfDay")]
 private void OnStartOfDay(object sender, EventArgs e)
 {
	 if ((bool)zone.Get("PMFSlurp.IsAlive") == true)
     {
     //Only assign cover valuse if crop is emerged
     CoverToday = CoverVals.GetCover(Clock.Today.Date,Column);
      
     if (CoverToday == 1)
        leaflai = Math.Log(0.01)/-Ext_coef;
     else
     {
    	if (CoverToday > 0)
            leaflai = Math.Log(1 - CoverToday) / -Ext_coef;
        else
            leaflai = 0;
     }
            object ResetValue = leaflai;
			zone.Set(OverRidePath, ResetValue);  
     }
   }
 }
}
```
        Report: EventNames=[Clock].DoReport
          VariableNames:
            [Clock].Today
            [Soil].SoilWater.Eo
            [Soil].SoilWater.Es
            [ExtraVariables].Script.SWC
            [ExtraVariables].Script.DUL
            [Soil].SoilWater.Drainage
            [Soil].SoilWater.Runoff
            [ExtraVariables].Script.OutFlowLat
            [Soil].SoilWater.pond
            [ExtraVariables].Script.AccumEO
            [ExtraVariables].Script.AccumEP
            [ExtraVariables].Script.AccumES
            [ExtraVariables].Script.AccumDrainage
            [ExtraVariables].Script.AccumRunoff
            [ExtraVariables].Script.AccumRainfall
            [ExtraVariables].Script.AccumIrrigation
            [ExtraVariables].Script.AccumOutflowLat
            [ExtraVariables].Script.SoilWaterDeficit
            [PMFSlurp].Root.WaterSupply
            [PMFSlurp].Root.WaterUptake
            [PMFSlurp].Leaf.Transpiration
            [PMFSlurp].Leaf.WaterDemand
            [PMFSlurp].Root.Depth
            [PMFSlurp].Leaf.CoverTotal
            [PMFSlurp].Leaf.LAI
            [PMFSlurp].Leaf.Height
            [Soil].SoilWater.SW
            [MicroClimate].net_radn
            [MicroClimate].peta
            [MicroClimate].petr
            [SetLAIofCrop].Script.leaflai
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