Simulations: Version=2
  Replacements
    Plant Slurp: CropType=Slurp
      Memo TitlePage
        # SLURP: the Sound of a crop using water

        This model has been built using the Plant Modelling Framework (PMF) of [brown_plant_2014] to provide a simple representation of crops.  It is usefull for water and nitrogen balance studies where the focus is on soil processes and a very simple crop is adequate.  The model does not predict crop growth, development or yields.  It simply takes up water and nitrogen.   .

        SLURP has no phenology so the behaviour of the SLURP is the same throughout its ontology (with the exception of root depth being able to increase).  SLURP consists of 2 organs:
           1. Leaf which ls represented with a Simpleleaf class and provides a Water uptake demand to the soil arbitrator.
           2. Root which extracts water and nitrogen from the soil for plant growth

        ##Inclusion in APSIM simulations
        A Slurp crop is included in a simulation the same as any other APSIM crop
         * The Slurp object needs to be dragged or copied from the Crop folder in the tool box into the field of your simulation.
         * It is then planted with a sowing rule
        <pre><code class='language-cs'>
        Slurp.Sow(cultivar: StaticCrop, population: 1, depth: 10, rowSpacing: 150);
        </code></pre>
          * Note that SLURP has no notion of population or rowSpacing but these parameters are required by the Sow method so filler values are provided
          * depth in the Sow arguement is the depth that the crop is sown at.  While this has no effect on emergence in SLURP it sets the depth that the root system is initialised at.  For static crops this depth should be set to the rooting depth that is expected as roots will not grow during the simulation

        ##Altering Slurp properties during runs
        In some cases users will wish to change properties of Slurp while the simulation is running.  This can be done using a the set method in a manager script.

        <pre><code class='language-cs'>
        object LAIResetValue = leaflai;
        zone.Set("Slurp.Leaf.LAIFunction.Value", LAIResetValue);
        object HeightResetValue = CoverToday * MaximumHeight;
        zone.Set("Slurp.Leaf.HeightFunction.Value", HeightResetValue);
        </code></pre>
      OrganArbitrator Arbitrator: NArbitrationOption=PriorityThenRelativeAllocation; DMArbitrationOption=RelativeAllocation
      Root: FractionRemoved=0; FractionToResidue=0; InitialDM=50; SpecificRootLength=40000; KNO3_yProperty=[0.02, 0.02]; KNO3_xRootLength=[0, 0.003]; KNH4_yProperty=[0, 0]; KNH4_xRootLength=[0, 0.003]; NuptakeSupply=0
        CompositeBiomass Live: Propertys=[[Root].LayerLive]
        CompositeBiomass Dead: Propertys=[[Root].LayerDead]
        AirTemperatureFunction TemperatureEffect
          XYPairs: X=[0, 26, 35]; Y=[0, 1, 1]
        Constant RootFrontVelocity: Value=0; Units=mm/d
        Constant MaxDailyNUptake: Value=1; Units=g/m2
        Constant MaximumRootDepth: Value=1000; Units=mm
        Constant NitrogenDemandSwitch: Value=1; Units=0-1
        LinearInterpolationFunction KLModifier: XProperty=[Root].LayerMidPointDepth
          XYPairs: X=[0, 400, 1500]; Y=[1, 1, 0]
          Memo Description
            This is important in SLURP as it is set for each species to represent their differences in rooting patterns between crop species
      SimpleLeaf Leaf: Albedo=0.018; Gsmax=0.01; R50=200
        zero: FractionRemoved, FractionToResidue, BiomassYesterday, LAI, Height, FRGR, PotentialEP, K, KDead, DeltaBiomass, LAIDead, WaterAllocation
        Biomass Live
        Biomass Dead
        Constant Photosynthesis: Value=5; Units=g/m2/d
        AirTemperatureFunction FRGRFunction
          XYPairs: X=[0, 10, 25, 40]; Y=[0, 1, 1, 0]
        PartitionFractionDemandFunction DMDemandFunction
          Constant PartitionFraction: Value=1; Units=0-1
        Constant NConc: Value=0.05; Units=g/g
        Constant LAIFunction: Value=5; Units=m2/m2
        Constant ExtinctionCoefficientFunction: Value=0.7
        Constant StructuralFraction: Value=0.5; Units=0-1
        Constant HeightFunction: Value=400; Units=mm
      Cultivar StaticCrop
        Memo Description
          The static crop is the base crop and uses all the paramaters values specified above.
      Cultivar StaticTree
        Command:
          [Root].MaximumRootDepth.Value = 2600
          [Leaf].ExtinctionCoefficientFunction.Value = 0.65
          [Leaf].HeightFunction.Value = 5000
          [Root].KLModifier.XYPairs.X = 0, 400, 500, 1000, 1500, 2000
          [Root].KLModifier.XYPairs.Y = 1, 1, 0.9, 0.6, 0.3, 0.1
        Memo Description
          The static tree is similar to the static crop but is taller, has a deeper root system and a lower extinction coefficient
      Cultivar Pasture
        Command:
          [Root].MaximumRootDepth.Value = 800
          [Root].RootFrontVelocity.Value = 15
          [Leaf].ExtinctionCoefficientFunction.Value = 0.65
          [Root].KLModifier.XYPairs.X = 0, 200, 500, 1000
          [Root].KLModifier.XYPairs.Y = 1, 1, 0.7, 0.0
        Memo Description
          The pasture differs from the base crop because its has a RootFrontVelocity of 15 (as opposed to zero) which means the roots grow downward from sowing untill the MaximumRootDepth is reached.  It ExtinctionCoefficient and MaximumRootDepth are different to the base StaticCrop and it has a different pattern of kl with depth.
      Cultivar Lucerne
        Command:
          [Root].MaximumRootDepth.Value = 2500
          [Root].RootFrontVelocity.Value = 15
          [Leaf].ExtinctionCoefficientFunction.Value = 0.8
          [Root].KLModifier.XYPairs.X = 0, 200, 500, 1000, 1500, 2000
          [Root].KLModifier.XYPairs.Y = 1, 1, 0.9, 0.6, 0.3, 0.1
        Memo Description
          Lucerne also grows root depth like pasture but has a greater root depth, different kl pattern and different extinction coefficient
  DataStore
    ExcelInput ProfileSWC: FileName=ShallowSoilTest\SoilWaterContent.xls; SheetNames=[ProfileSWC]
    ExcelInput LayerSWC: FileName=ShallowSoilTest\SoilWaterContent.xls; SheetNames=[LayerSWC]
    ExcelInput Cover: FileName=ShallowSoilTest\CoverDataObs.xls; SheetNames=[Cover]
    Input: ErrorMessage=Specified cast is not valid.; FileName=ShallowSoilTest\CoverInterpolated.csv
  Tests TestsBinary
    Test:
      SimulationName  TableName  Type       ColumnNames                  Parameters
      LandP           Report     Tolerance  [ExtraVariables].Script.SWC  1,1
      LandP           Report     Tolerance  [Slurp].Leaf.CoverTotal      1,1
      Tests           Report     Tolerance  AccumIrrigation              1,1
  Simulation SlurpTestBase: Area=0; Slope=0
    Memo
      This is a simple test that plants SLURP, changes its leaf area index and potential biomass production on one occasion and presents some graphs of Plant, N and Water balance components to show things are working.
    Weather: FileName=%root%\Examples\WeatherFiles\lincoln.met
    Clock: StartDate=1998-10-14; EndDate=1999-05-01
    Summary
    SoilArbitrator Soil Arbitrator
    Zone Field: Area=0; Slope=0
      Soil: Latitude=0; Longitude=0
        Analysis: Thickness=[100, 200, 300, 300, 300, 300]; PH=[6.6, 6.2, 5.7, 5.5, 5.5, 5.5]; PHUnits=Water; BoronUnits=HotWater
        InitialWater Initial water: PercentMethod=EvenlyDistributed; FractionFull=1
        Water
          Thickness  BD   AirDry  LL15  DUL   SAT
          100        1.2  0.08    0.13  0.33  0.5
          200        1.2  0.13    0.13  0.33  0.5
          300        1.2  0.1     0.1   0.31  0.44
          300        1.2  0.06    0.06  0.15  0.46
          300        1.2  0.04    0.04  0.1   0.44
          300        1.2  0.02    0.02  0.06  0.44
          SoilCrop SlurpSoil: LL=[0.13, 0.13, 0.1, 0.08, 0.11, 0.11]; KL=[0.06, 0.06, 0.06, 0.06, 0.06, 0.06]; XF=[1, 1, 1, 1, 1, 1]
          SoilCrop PotatoSoil: LL=[0.13, 0.13, 0.27, 0.27, 0.3, 0.3]; KL=[0.1, 0.06, 0.03, 0.01, 0, 0]; XF=[1, 1, 0.1, 0, 0, 0]
        SoilWater: residueinterception=0; SummerDate=1-Nov; SummerU=9; SummerCona=4.4; WinterDate=1-Apr; WinterU=9; WinterCona=4.4; DiffusConst=88; DiffusSlope=35.4; Salb=0.18; CN2Bare=68; CNRed=20; CNCov=0.8; slope=0; discharge_width=0; catchment_area=0; max_pond=0
          Thickness  SWCON  KLAT
          100        0.55   0
          200        0.55   0
          300        0.55   0
          300        0.55   0
          300        0.55   0
          300        0.55   0
        SoilNitrogen: fom_type=[default, manure, mucuna, lablab, shemp, stable]; fract_carb=[0.2, 0.3, 0.54, 0.57, 0.45, 0]; fract_cell=[0.7, 0.3, 0.37, 0.37, 0.47, 0.1]; fract_lign=[0.1, 0.4, 0.09, 0.06, 0.08, 0.9]; wfpsN2N2O_x=[22, 88]; wfpsN2N2O_y=[0.1, 1]; oc=[1.83566, 1.46334, 1.19884, 1.0301, 0.470338, 0.470138]
        SoilOrganicMatter: RootCN=30; RootWt=3000; SoilCN=11.5; EnrACoeff=7.4; EnrBCoeff=0.2; OCUnits=Total
          Thickness  OC    FBiom  FInert
          100        1.82  0.025  0.3
          200        1.47  0.025  0.4
          300        1.2   0.015  0.75
          300        1.03  0.01   0.9
          300        0.47  0.01   0.96
          300        0.47  0.01   0.96
        Sample Initial nitrogen: NO3Units=kgha; NH4Units=ppm; SWUnits=Volumetric; OCUnits=Total; PHUnits=Water
          Thickness  NO3  NH4
          100        17   0
          200        30   0
          300        5    0
          300        5    0
          300        0    0
          300        0    0
      Plant Slurp: CropType=Slurp
      MicroClimate: a_interception=0; b_interception=1; c_interception=0; d_interception=0; soil_albedo=0.23; air_pressure=1010; soil_emissivity=0.96; sun_angle=15; soil_heat_flux_fraction=0.4; night_interception_fraction=0.5; windspeed_default=3; refheight=2; albedo=0.26; emissivity=0.96; gsmax=0.01; r50=200
      Irrigation
      Fertiliser
      Manager SlurpSowingRule
        CultivarName = StaticCrop
        InitialRootDepth = 600
        SowingDate = 1998-10-14
```csharp
using System;
using Models.Core;
using Models.PMF;
using APSIM.Shared.Utilities;
        
namespace Models
{
	[Serializable] 
	[System.Xml.Serialization.XmlInclude(typeof(Model))]
	public class Script : Model
	{
		[Link] Plant Slurp;
		[Link] Clock Clock;

		[Description("Cultivar")]
		public string CultivarName { get; set; }
		[Description("Initial Root Depth")]
		public double InitialRootDepth { get; set; }
		[Description("Sowing Date")]
		public DateTime SowingDate { get; set; }

               
		[EventSubscribe("DoManagement")]
		private void OnDoManagement(object sender, EventArgs e)
		{
			if (Clock.Today.Date == SowingDate)
				Slurp.Sow(cultivar: CultivarName, population: 1, depth: InitialRootDepth, rowSpacing: 150);
			//Potato.Sow(... Contains the following arguements:
			//Population  double  Optional  Seeds sowing/m2.  Default is zero
			//Cultivar    string  Required  "NameOfCultivar"
			//Depth       double  Optional  Depth (mm) seed sown.   Default is 100mm 
			//MaxCover    double  Optional  Proportion (0-1) of the ground row crop will cover.   Default is 1.0
			//BudNumber   double  Optional  Number of mainstems per seed sown.  Default is 1.0
			//RowSpacing  double  Optional  Spaceing (mm) between drill rows when crop is sown.  Default is 150mm
			//CropClass   string  Optional  Crop class to instantiate when crop is sown.  Default is "Plant"
		}
	}
}
```
      Manager ExtraVariables
```csharp
using System;
using Models.Core;
using System.Collections.Generic;
using System.Text;
using Models.Soils;
using Models.PMF;
using Models;
using System.Xml.Serialization;
using APSIM.Shared.Utilities;

namespace Models
{
	[Serializable] 
	public class Script : Model
	{
		[Link] Clock Clock;
		[Link] Soils.Soil Soil;
		[Link] Models.SurfaceOM.SurfaceOrganicMatter SOM;
		[Link] Weather Met;
		[Link] Fertiliser Fert;
		[Link] Irrigation Irrig;
		[Link] Plant Slurp;
		[Link] Zone zone;
					
		[XmlIgnore] public bool InitialDay { get; set; }
		
		[XmlIgnore] public double AccumPlantN { get; set; }
		[XmlIgnore] public double AccumMineralisation { get; set; }
		[XmlIgnore] public double AccumDenit { get; set; }
		[XmlIgnore] public double AccumFert { get; set; }
		[XmlIgnore] public double AccumLeach { get; set; }
		[XmlIgnore] public double AccumDetach { get; set; }
		[XmlIgnore] public double DeltaSoilOMN { get; set; }
		[XmlIgnore] public double DeltaSurfaceOMN { get; set; }
		[XmlIgnore] public double DeltaSoilMineralN { get; set; }
		[XmlIgnore] public double SoilNitrogenContent { get; set; }
		
		[XmlIgnore] public double AccumEO { get; set; }
		[XmlIgnore] public double AccumEP { get; set; }
		[XmlIgnore] public double AccumES { get; set; }
		[XmlIgnore] public double AccumDrainage { get; set; }
		[XmlIgnore] public double AccumRunoff { get; set; }
		[XmlIgnore] public double AccumOutflowLat { get; set; }
		[XmlIgnore] public double AccumIrrigation { get; set; }
		[XmlIgnore] public double AccumRainfall { get; set; }
		[XmlIgnore] public double SoilWaterDeficit { get; set; }
	
		[XmlIgnore] public double  InitialSoilOMN { get; set; }
		[XmlIgnore] public double  InitialSurfaceOMN { get; set; }
		[XmlIgnore] public double  InitialMineralN { get; set; }
		
		[XmlIgnore] public double SWC { get; set; }
		[XmlIgnore] public double DUL { get; set; }
		[XmlIgnore] public double OutFlowLat { get; set; }

		[XmlIgnore] public double FomN { get; set; }
		[XmlIgnore] public double BiomN { get; set; }
		[XmlIgnore] public double HumN { get; set; }
		[XmlIgnore] public double OrganicN { get; set; }
		[XmlIgnore] public double NO3N { get; set; }
		[XmlIgnore] public double NH4N { get; set; }
		[XmlIgnore] public double UreaN { get; set; }
		[XmlIgnore] public double MineralN { get; set; }
		[XmlIgnore] public double DltNMinRes { get; set; }
		[XmlIgnore] public double DltNMinTot { get; set; }
		
		[EventSubscribe("Commencing")]
		private void OnSimulationCommencing(object sender, EventArgs e)
		{
			InitialDay = true;
		}
		
		[EventSubscribe("DoManagement")]
		private void OnDoManagement(object sender, EventArgs e)
		{
			//!!!!!! Nitrogen balance components !!!!!!
			//!!!!!!^^^^^^^^^^^^^^^^^^^^^^^^^^^^^!!!!!!
			FomN = MathUtilities.Sum(Soil.SoilNitrogen.FOMN);
			HumN = MathUtilities.Sum(Soil.SoilNitrogen.HumicN);
			BiomN = MathUtilities.Sum(Soil.SoilNitrogen.MicrobialN);
			OrganicN = FomN + HumN + BiomN;
			NO3N = MathUtilities.Sum(Soil.NO3N);
			NH4N = MathUtilities.Sum(Soil.NH4N);
			UreaN = MathUtilities.Sum(Soil.SoilNitrogen.urea);
			MineralN = NO3N + NH4N + UreaN; 
			DltNMinRes = MathUtilities.Sum(Soil.SoilNitrogen.dlt_n_min_res);
			DltNMinTot = MathUtilities.Sum(Soil.SoilNitrogen.MineralisedN);
			int layers = Soil.Thickness.Length;
			if (InitialDay == true)
			{
				InitialSurfaceOMN = SOM.N;
				InitialSoilOMN = OrganicN;
				InitialMineralN = MineralN;
				InitialDay = false;
			}
			AccumFert += Fert.NitrogenApplied;
			DeltaSurfaceOMN = SOM.N - InitialSurfaceOMN;
			AccumLeach = AccumLeach - Soil.SoilWater.LeachNH4 - Soil.SoilWater.LeachNO3 - Soil.SoilWater.LeachUrea; //Fails
			AccumMineralisation += MathUtilities.Sum(Soil.SoilNitrogen.MineralisedN);
			AccumDenit -= MathUtilities.Sum(Soil.SoilNitrogen.Denitrification);
			AccumPlantN -= (double)zone.Get("Slurp.Root.NUptake");
			DeltaSoilOMN = OrganicN - InitialSoilOMN;
			DeltaSoilMineralN = MineralN - InitialMineralN;
			SoilNitrogenContent = MineralN;
			
			//!!!!!! Water balance components !!!!!!
			//!!!!!!^^^^^^^^^^^^^^^^^^^^^^^^^^!!!!!!

			AccumIrrigation += Irrig.IrrigationApplied;
			AccumRainfall += Met.Rain;
			//AccumEP -= (double)zone.Get("[Slurp].Leaf.Transpiration");
			AccumEP -= (double)zone.Get("Slurp.Root.WaterUptake");
			SoilWaterDeficit = (SWC - DUL);
			double OutFlowLat = MathUtilities.Sum(Soil.SoilWater.outflow_lat);
			AccumOutflowLat -= OutFlowLat;
		}
		
		[EventSubscribe("DoManagementCalculations")]
		private void OnDoManagementCalculations(object sender, EventArgs e)
		{
			FomN = MathUtilities.Sum(Soil.SoilNitrogen.FOMN);
			HumN = MathUtilities.Sum(Soil.SoilNitrogen.HumicN);
			BiomN = MathUtilities.Sum(Soil.SoilNitrogen.MicrobialN);
			
			
			AccumEO -= Soil.SoilWater.Eo;
			AccumES -= Soil.SoilWater.Es; 
			AccumDrainage -= Soil.SoilWater.Drainage;
			AccumRunoff -= Soil.SoilWater.Runoff;
			SWC = MathUtilities.Sum(Soil.SoilWater.SWmm);
			DUL = MathUtilities.Sum(Soil.SoilWater.DULmm);
		}
	}
}
```
      SurfaceOrganicMatter surface organic matter: PondActive=no; ReportAdditions=no; ReportRemovals=no; PoolName=wheat; type=wheat; mass=2000; standing_fraction=0; cnr=80; CriticalResidueWeight=2000; OptimumDecompTemp=20; MaxCumulativeEOS=20; CNRatioDecompCoeff=0.277; CNRatioDecompThreshold=25; TotalLeachRain=25; MinRainToLeach=10; CriticalMinimumOrganicC=0.004; DefaultCPRatio=0; DefaultStandingFraction=0; StandingExtinctCoeff=0.5; FractionFaecesAdded=0.5
        Pools:
          {PoolName=wheat, ResidueType=wheat, Mass=2000, CNRatio=80, StandingFraction=0}
        ResidueTypes: LoadFromResource=ResidueTypes
        TillageTypes TillageTypesList
      Operations
        1998-10-02  [Irrigation].Apply(40);
        1998-10-26  [Irrigation].Apply(70);
        1998-12-15  [Irrigation].Apply(70);
        1998-12-29  [Irrigation].Apply(10);
        1998-12-30  [Irrigation].Apply(55);
        1999-01-07  [Irrigation].Apply(50);
        1999-01-21  [Irrigation].Apply(40);
        1999-02-10  [Irrigation].Apply(28);
        1999-02-19  [Irrigation].Apply(15);
        1999-03-09  [Irrigation].Apply(25);
        1998-12-29  [Fertiliser].Apply(50, Fertiliser.Types.UreaN, 10);
      Report: EventNames=[Clock].DoReport
        VariableNames:
          [Clock].Today
          [ExtraVariables].Script.AccumPlantN
          [ExtraVariables].Script.AccumMineralisation
          [ExtraVariables].Script.AccumDenit
          [ExtraVariables].Script.AccumFert
          [ExtraVariables].Script.AccumLeach
          [ExtraVariables].Script.AccumDetach
          [ExtraVariables].Script.DeltaSoilOMN
          [ExtraVariables].Script.DeltaSurfaceOMN
          [ExtraVariables].Script.DeltaSoilMineralN
          [Slurp].Root.NSupply
          [Soil].SoilWater.Eo
          [Soil].SoilWater.Es
          [ExtraVariables].Script.SWC
          [ExtraVariables].Script.DUL
          [Soil].SoilWater.Drainage
          [Soil].SoilWater.Runoff
          [ExtraVariables].Script.OutFlowLat
          [Soil].SoilWater.pond
          [ExtraVariables].Script.AccumEO
          [ExtraVariables].Script.AccumEP
          [ExtraVariables].Script.AccumES
          [ExtraVariables].Script.AccumDrainage
          [ExtraVariables].Script.AccumRunoff
          [ExtraVariables].Script.AccumRainfall
          [ExtraVariables].Script.AccumIrrigation
          [ExtraVariables].Script.AccumOutflowLat
          [ExtraVariables].Script.SoilWaterDeficit
          [Slurp].Leaf.Live.Wt
          [Slurp].Root.Live.Wt
          [Slurp].Leaf.Live.N
          [Slurp].Root.Live.N
          [Slurp].Leaf.Live.NConc
          [Slurp].Root.Live.NConc
          [Slurp].Root.WaterSupply
          [Slurp].Root.WaterUptake
          [Slurp].Leaf.Transpiration
          [Slurp].Leaf.WaterDemand
          [Slurp].Root.Depth
          [Slurp].Leaf.CoverTotal
          [Slurp].Leaf.CoverDead
          [Slurp].Leaf.LAI
          [Slurp].Leaf.Height
          [Slurp].Leaf.PotentialBiomass.Value
          [Soil].SoilWater.SWmm
          [Soil].NO3N
          [ExtraVariables].Script.SoilNitrogenContent
          [Slurp].Arbitrator.NDemand
          [MicroClimate].net_radn
          [MicroClimate].peta
          [MicroClimate].petr
          [ExtraVariables].Script.FomN
          [ExtraVariables].Script.HumN
          [ExtraVariables].Script.BiomN
          [ExtraVariables].Script.DltNMinRes
          [ExtraVariables].Script.DltNMinTot
          [Slurp].Leaf.Fw
          [Slurp].Leaf.Fn
      Manager ResetProduction
        OverRidePath = Slurp.Leaf.Photosynthesis.Value
        OverRideInterger = 2
        ChangeDate = 1998-11-14
```csharp
using System;
using Models.Core;
using System.Collections.Generic;
using System.Text;
using Models.PMF;
using Models;
using System.Xml.Serialization;
using APSIM.Shared.Utilities;

namespace Models
{
	[Serializable] 
	public class Script : Model
	{
		[Link] Plant Plant;
		[Link] Clock Clock;
		[Link] Zone zone;
		
		[Description("Path for coefficient to be Overwritten")]
		public string OverRidePath { get; set; }
		[Description("Value for new coefficient Interger")]
		public int OverRideInterger { get; set; }
		[Description("Sowing Date")]
		public DateTime ChangeDate { get; set; }
        
		[EventSubscribe("DoManagement")]
		private void OnDoManagement(object sender, EventArgs e)
		{
			if (Clock.Today.Date == ChangeDate)
			{
				object ResetValue = OverRideInterger;
				zone.Set(OverRidePath, ResetValue);
			}
		}
	}
}
```
      Manager ResetLAI
        OverRidePath = Slurp.Leaf.LAIFunction.Value
        OverRideInterger = 3
        ChangeDate = 1999-01-01
        script: same as in SlurpTestBase.Field.ResetProduction
  Experiment Tests
    Memo
      This test has combinations of different Soils and Climate with Slurp run over 10 years and an automatic irrigation rule included.  This demonstrats that simulations including Slurp can generate sensible patterns in irrgation, drainage, runoff and potential water stress index
    Factors
      Factor Climate
        Factor P087073
          Specifications:
            [Weather].FileName = %root%\Prototypes\PMFSlurp\Weather\P087073.met
            [Clock].StartDate = 1980-03-01
        Factor P108081
          Specifications:
            [Weather].FileName = %root%\Prototypes\PMFSlurp\Weather\P108081.met
            [Clock].StartDate = 1980-03-01
        Factor P128077
          Specifications:
            [Weather].FileName = %root%\Prototypes\PMFSlurp\Weather\P128077.met
            [Clock].StartDate = 1980-03-01
      Factor Soil: Specifications=[Soil]
        Soil XL: SoilType=NZ_sedementary; Region=Plains; State=Canterbury; Country=New Zealand; Latitude=0; Longitude=0
          DataSource=Generic profile descriptions provided by Trevor Webb and data for functional horizions based on SWAMP project results
          Comments=Bulk density values were measured on the fine earth fraction so values entered into apsim soil are adjusted down to account for stone content (assuming stones are inert from all soil process so their mass and volume is removed from model paramaters).  SAT, DUL, LL15 and Air dry have been adjusted down to account for stone content.  OC has not been adjusted so the model will get the correct carbon and N amounts using the adjusted BD.
          Water
            Thickness  BD      AirDry  LL15   DUL      SAT     KS
            80         0.77    0.0165  0.033  0.1925   0.2365  1000
            50         0.63    0.0135  0.027  0.1575   0.1935  1000
            200        0.4225  0.013   0.013  0.04225  0.13    1000
            270        0.42    0.01    0.01   0.04     0.13    1000
            400        0.2     0.008   0.008  0.022    0.1     1000
            500        0.2     0.01    0.01   0.02     0.1     1000
            SoilCrop SLURPSoil: LL=[0.033, 0.027, 0.013, 0.013, 0.008, 0.008]; KL=[0.2, 0.2, 0.2, 0.2, 0.2, 0.2]; XF=[1, 1, 1, 1, 1, 1]
          Analysis: Thickness=[80, 50, 200, 670, 500]; PH=[6, 6, 6, 6, 6]; PHUnits=Water; BoronUnits=HotWater
          SoilWater: residueinterception=0; SummerDate=1-Oct; SummerU=9; SummerCona=4.4; WinterDate=1-Apr; WinterU=6; WinterCona=3; DiffusConst=88; DiffusSlope=35; Salb=0.13; CN2Bare=60; CNRed=20; CNCov=0.8; max_pond=0; Thickness=[80, 50, 200, 670, 500]; SWCON=[0.9, 0.9, 0.9, 0.9, 0.9]
          SoilNitrogen: fom_type=[default, manure, mucuna, lablab, shemp, stable]; fract_carb=[0.2, 0.3, 0.54, 0.57, 0.45, 0]; fract_cell=[0.7, 0.3, 0.37, 0.37, 0.47, 0.1]; fract_lign=[0.1, 0.4, 0.09, 0.06, 0.08, 0.9]; wfpsN2N2O_x=[22, 88]; wfpsN2N2O_y=[0.1, 1]
          SoilOrganicMatter: RootCN=40; RootWt=1000; SoilCN=11; EnrACoeff=7.4; EnrBCoeff=0.2; OCUnits=Total
            Thickness  OC        FBiom      FInert
            80         3.18052   0.0414651  0.437
            50         3.18052   0.0313037  0.536744
            200        1.53923   0.0200631  0.681609
            670        0.217285  0.01074    0.913661
            500        0.20005   0.0100221  0.985071
          InitialWater: PercentMethod=FilledFromTop; FractionFull=1
          Sample: NO3Units=kgha; NH4Units=kgha; SWUnits=Volumetric; OCUnits=Total; PHUnits=Water
            Thickness  NO3  NH4
            80         25   1
            50         20   1
            200        15   1
            670        10   1
        Soil L: SoilType=NZ_sedementary; Region=Plains; State=Canterbury; Country=New Zealand; Latitude=0; Longitude=0
          DataSource=Generic profile descriptions provided by Trevor Webb and data for functional horizions based on SWAMP project results
          Comments=Bulk density values were measured on the fine earth fraction so values entered into apsim soil are adjusted down to account for stone content (assuming stones are inert from all soil process so their mass and volume is removed from model paramaters).  SAT, DUL, LL15 and Air dry have been adjusted down to account for stone content.  OC has not been adjusted so the model will get the correct carbon and N amounts using the adjusted BD.
          Water
            Thickness  BD      AirDry   LL15    DUL     SAT       KS
            200        1.3105  0.07675  0.1535  0.3735  0.456165  600
            150        1.474   0.152    0.152   0.32    0.41292   600
            250        0.775   0.05     0.07    0.2     0.2       600
            100        0.455   0.014    0.014   0.0455  0.14      600
            300        0.2     0.008    0.008   0.022   0.1       600
            500        0.2     0.008    0.008   0.022   0.1       600
            SoilCrop SLURPSoil: LL=[0.154, 0.152, 0.05, 0.014, 0.008, 0.008]; KL=[0.1, 0.1, 0.1, 0.1, 0.1, 0.1]; XF=[1, 1, 1, 1, 1, 1]
          Analysis: Thickness=[200, 150, 150, 200, 300, 500]; PH=[6, 6, 6, 6, 6, 6]; PHUnits=Water; BoronUnits=HotWater
          SoilWater: residueinterception=0; SummerDate=1-Oct; SummerU=9; SummerCona=4.4; WinterDate=1-Apr; WinterU=6; WinterCona=3; DiffusConst=88; DiffusSlope=35; Salb=0.13; CN2Bare=67; CNRed=20; CNCov=0.8; max_pond=0; Thickness=[200, 150, 150, 200, 300, 500]; SWCON=[0.496442, 0.56107, 0.471266, 0.650598, 0.6506, 0.6506]
          SoilNitrogen: fom_type=[default, manure, mucuna, lablab, shemp, stable]; fract_carb=[0.2, 0.3, 0.54, 0.57, 0.45, 0]; fract_cell=[0.7, 0.3, 0.37, 0.37, 0.47, 0.1]; fract_lign=[0.1, 0.4, 0.09, 0.06, 0.08, 0.9]; wfpsN2N2O_x=[22, 88]; wfpsN2N2O_y=[0.1, 1]
          SoilOrganicMatter: RootCN=40; RootWt=1000; SoilCN=11; EnrACoeff=7.4; EnrBCoeff=0.2; OCUnits=Total
            Thickness  OC        FBiom      FInert
            200        2.88977   0.0319525  0.493608
            150        0.971538  0.017682   0.700441
            150        0.80854   0.0131233  0.808993
            200        0.800258  0.0110929  0.887009
            300        0.800002  0.0102439  0.946627
            500        0.8       0.0100221  0.983924
          InitialWater: PercentMethod=FilledFromTop; FractionFull=1
          Sample: NO3Units=kgha; NH4Units=kgha; SWUnits=Volumetric; OCUnits=Total; PHUnits=Water
            Thickness  NO3  NH4
            80         25   1
            50         20   1
            200        15   1
            670        10   1
        Soil M: SoilType=NZ_sedementary; Region=Plains; State=Canterbury; Country=New Zealand; Latitude=0; Longitude=0
          DataSource=Generic profile descriptions provided by Trevor Webb and data for functional horizions based on SWAMP project results
          Comments=Bulk density values were measured on the fine earth fraction so values entered into apsim soil are adjusted down to account for stone content (assuming stones are inert from all soil process so their mass and volume is removed from model paramaters).  SAT, DUL, LL15 and Air dry have been adjusted down to account for stone content.  OC has not been adjusted so the model will get the correct carbon and N amounts using the adjusted BD.
          SoilOrganicMatter: RootCN=40; RootWt=1000; SoilCN=11; EnrACoeff=7.4; EnrBCoeff=0.2; OCUnits=Total
            Thickness  OC        FBiom      FInert
            250        2.36763   0.0288947  0.449328
            300        0.493357  0.0136287  0.758676
            300        0.226613  0.0105998  0.901885
            300        0.202414  0.0100992  0.960109
            350        0.200179  0.0100141  0.984954
          Water
            Thickness  BD      AirDry   LL15    DUL     SAT       KS
            250        1.3105  0.07675  0.1535  0.3735  0.456165  400
            350        1.524   0.201    0.201   0.332   0.39432   400
            250        1.65    0.201    0.201   0.3375  0.358515  400
            300        0.39    0.012    0.012   0.039   0.12      400
            350        0.39    0.012    0.012   0.039   0.12      400
            SoilCrop SLURPSoil: LL=[0.1535, 0.201, 0.201, 0.012, 0.012]; KL=[0.1, 0.1, 0.1, 0.1, 0.1]; XF=[1, 0.449329, 0.090718, 1, 1]
          Analysis: Thickness=[250, 300, 300, 300, 350]; PH=[6, 6, 6, 6, 6]; PHUnits=Water; BoronUnits=HotWater
          SoilWater: residueinterception=0; SummerDate=1-Oct; SummerU=9; SummerCona=4.4; WinterDate=1-Apr; WinterU=6; WinterCona=3; DiffusConst=88; DiffusSlope=35; Salb=0.13; CN2Bare=70; CNRed=20; CNCov=0.8; max_pond=0; Thickness=[250, 300, 300, 300, 350]; SWCON=[0.496442, 0.365575, 0.0968316, 0.650598, 0.650598]
          SoilNitrogen: fom_type=[default, manure, mucuna, lablab, shemp, stable]; fract_carb=[0.2, 0.3, 0.54, 0.57, 0.45, 0]; fract_cell=[0.7, 0.3, 0.37, 0.37, 0.47, 0.1]; fract_lign=[0.1, 0.4, 0.09, 0.06, 0.08, 0.9]; wfpsN2N2O_x=[22, 88]; wfpsN2N2O_y=[0.1, 1]
          SoilOrganicMatter: same as Tests.Factors.Soil.M.SoilOrganicMatter
          InitialWater: PercentMethod=FilledFromTop; FractionFull=1
          Sample: NO3Units=kgha; NH4Units=kgha; SWUnits=Volumetric; OCUnits=Total; PHUnits=Water
            Thickness  NO3  NH4
            80         25   1
            50         20   1
            200        15   1
            670        10   1
    Simulation SoilXClimateBase: Area=0; Slope=0
      Weather: FileName=%root%\Prototypes\PMFSlurp\Weather\P087073.met
      Clock: StartDate=1980-03-01; EndDate=1990-03-01
      Summary
      SoilArbitrator Soil Arbitrator
      Zone Field: Area=0; Slope=0
        Plant Slurp: CropType=Slurp
        SurfaceOrganicMatter surface organic matter: same as SlurpTestBase.Field.surface organic matter
        MicroClimate: same as SlurpTestBase.Field.MicroClimate
        Irrigation
        Fertiliser
        Manager SowPasture
          CultivarName = Pasture
          InitialRootDepth = 10
          SowingDate = 1980-03-01
```csharp
using System;
using Models.Core;
using Models.PMF;
using System.Xml.Serialization;
namespace Models
{
	[Serializable] 
	[System.Xml.Serialization.XmlInclude(typeof(Model))]
	public class Script : Model
	{
		[Link] Plant SLURP;
		[Link] Clock Clock;
		[Link] Fertiliser Fert;

		[Description("Cultivar")]
		public string CultivarName { get; set; }
		[Description("Initial Root Depth")]
		public double InitialRootDepth { get; set; }
		[Description("Sowing Date (dd/mm)")]
		public DateTime SowingDate { get; set; }
		
			
		//Calculate static soil variables
		[EventSubscribe("StartOfSimulation")]
		private void OnStartOfSimulation(object sender, EventArgs e)
		{
			   	
		}
		               
		[EventSubscribe("DoManagement")]
		private void OnDoManagement(object sender, EventArgs e)
		{
			if (Clock.Today.Date == SowingDate)
			{
				SLURP.Sow(cultivar: "Pasture", population: 1, depth: InitialRootDepth, rowSpacing: 150);
			}
			
			if ((Clock.Today.Month == 7) && (Clock.Today.Day == 1))
			{
				SLURP.Harvest(); //Slurp doesn't do anything on harvest but we can use this event to trigger a report at the end of each year.
			}
		}
	}
}
```
        Manager ExtraVariables
```csharp
using System;
using Models.Core;
using System.Collections.Generic;
using System.Text;
using Models.Soils;
using Models.PMF;
using Models;
using System.Xml.Serialization;
using APSIM.Shared.Utilities;

namespace Models
{
	[Serializable] 
	public class Script : Model
	{
		[Link] Clock Clock;
		[Link] Soils.Soil Soil;
		[Link] Models.SurfaceOM.SurfaceOrganicMatter SOM;
		[Link] Weather Met;
		[Link] Fertiliser Fert;
		[Link] Irrigation Irrig;
		[Link] Plant SLURP;
		[Link] Zone zone;
		//Link] Soil.SoilWater SoilWater;
					
		[XmlIgnore] private bool ZeroTomorrow { get; set; }

		[XmlIgnore] public double AccumEO { get; set; }
		[XmlIgnore] public double AccumEP { get; set; }
		[XmlIgnore] public double AccumES { get; set; }
		[XmlIgnore] public double AccumDrainage { get; set; }
		[XmlIgnore] public double AccumRunoff { get; set; }
		[XmlIgnore] public double AccumIrrigation { get; set; }
		[XmlIgnore] public double AccumRainfall { get; set; }
		
		[XmlIgnore] private double AccumDays { get; set; }
		[XmlIgnore] private double AccumTemp { get; set; }
		[XmlIgnore] private double AccumRadn { get; set; }
		[XmlIgnore] private double AccumFW { get; set; }
		
		[XmlIgnore] public double MeanTemp { get; set; }
		[XmlIgnore] public double MeanRadn { get; set; }
		[XmlIgnore] public double MeanFW { get; set; }
		
		[XmlIgnore] public double DUL { get; set; }
		[XmlIgnore] public double SWD { get; set; }
		[XmlIgnore] public double SWC { get; set; }
		

		
		[EventSubscribe("Commencing")]
		private void OnSimulationCommencing(object sender, EventArgs e)
		{
			ZeroTomorrow = false;
		}
		
		[EventSubscribe("StartOfDay")]
		private void OnStartOfDay(object sender, EventArgs e)
		{

		}
		
		[EventSubscribe("DoManagement")]
		private void OnDoManagement(object sender, EventArgs e)
		{
			AccumRainfall += Met.Rain;
			AccumEP -= (double)zone.Get("Slurp.Root.WaterUptake");
			
			SWD = (SWC - DUL);
		}
		
		[EventSubscribe("DoManagementCalculations")]
		private void OnDoManagementCalculations(object sender, EventArgs e)
		{
			if ((Clock.Today.Month == 7) && (Clock.Today.Day == 1))
			{
				AccumEO = 0;
				AccumEP = 0;
				AccumES = 0;
				AccumDrainage = 0;   
				AccumRunoff = 0;  
				AccumIrrigation = 0;   
				AccumRainfall = 0;  
		
				AccumDays = 0;  
				AccumTemp = 0;   
				AccumRadn = 0;   
				AccumFW = 0;  
				
				ZeroTomorrow = false;
			}
			
			AccumIrrigation += Irrig.IrrigationApplied;
			AccumEO -= Soil.SoilWater.Eo;
			AccumES -= Soil.SoilWater.Es; 
			AccumDrainage -= Soil.SoilWater.Drainage;
			AccumRunoff -= Soil.SoilWater.Runoff;
			
			if (SLURP.IsAlive == true)
			{
				AccumDays += 1;
				AccumTemp += ((Met.MinT + Met.MaxT) / 2);
				AccumRadn += Met.Radn;
				AccumFW += (double)zone.Get("Slurp.Leaf.Fw");
			}
		    
			MeanTemp = AccumTemp / AccumDays;
			MeanRadn = AccumRadn / AccumDays;
			MeanFW = AccumFW / AccumDays;
			
			SWC = MathUtilities.Sum(Soil.SoilWater.SWmm);
			DUL = MathUtilities.Sum(Soil.SoilWater.DULmm);
		}
	}
}
```
        Manager GrowAndGrazeCanopy
          MaxLAI = 5
          LAIRate = 0.012
          MaximumHeight = 400
          LAI = 0
```csharp
using System;
using Models.Core;
using System.Collections.Generic;
using System.Text;
using Models.PMF;
using Models;
using System.Xml.Serialization;
using APSIM.Shared.Utilities;
using System.IO;
	  

namespace Models
{
	[Serializable] 
	public class Script : Model
	{
		[Link] Clock Clock;
		[Link] Zone zone;
		[Link] Simulation simulation;
		[Link] Summary Summary;
		[Link] Weather Met;
   
		
		[Description("Maximum LAI achieved by pasture")]
		public  double MaxLAI { get; set; }
		[Description("Leaf Area Expansion Rate")]
		public double LAIRate { get; set; }
		//[Description("Extinction coefficient")]
		//public  double Ext_coef { get; set; }
		[Description("Maximum height of the crop at full cover")]
		public double MaximumHeight { get; set; }
		
		public double LAI { get; set; }
		public double ResidualFactor;
		
		[EventSubscribe("StartOfSimulation")]
		private void OnStartOfSimulation(object sender, EventArgs e)
		{
			LAI = 0;
			ResidualFactor = 0.4;
		}
      
		[EventSubscribe("StartOfDay")]
		private void OnStartOfDay(object sender, EventArgs e)
		{
			LAI += LAIRate * (Met.MaxT + Met.MinT) / 2;
				
			if (LAI > MaxLAI)
			{
				LAI *= ResidualFactor;
				Summary.WriteMessage(this, "Defoliation today reduced LAI to " + LAI);
			}
			object LeafLAI = LAI;
			zone.Set("Slurp.Leaf.LAIFunction.Value", LeafLAI);
			object Height = MaximumHeight * (LAI / MaxLAI);
			zone.Set("Slurp.Leaf.HeightFunction.Value", Height);  
		}
	}
}
```
        Manager IrrigationControl
          Irrigation_Yes_No = yes
          Season_Start = 1-Oct
          Season_End = 30-Apr
          Season_Allocation = 1000
          Refull_Frac = 0.9
          Trigger_Frac = 0.5
          Return_days = 3
          Maximum_Irrigation_Amount = 40
          Top_Depth = 600
```csharp
using System;
using Models.Core;
using Models.PMF;
using Models.Soils;
using System.Xml.Serialization;
using Models.PMF;
using APSIM.Shared.Utilities;

        
namespace Models
{
	[Serializable] 
	[System.Xml.Serialization.XmlInclude(typeof(Model))]
	public class Script : Model
	{
		//Communication to other modules
		[Link] ISummary summary = null;
		[Link] Irrigation Irrigation;
		[Link] Clock Clock;
		[Link] Soil Soil;
		[Link] Plant SLURP;
	   
		//User inputs from properties tab
		[Description("Irrigation on (yes or no)")]
		public string Irrigation_Yes_No { get; set; }
		[Description("SeasonStart (dd-MMM)")]
		public string Season_Start { get; set; }
		[Description("SeasonEnd (dd-MMM)")]
		public string Season_End { get; set; }
		[Description("Season Allocation (mm)")]
		public double Season_Allocation { get; set; }
		[Description("% PAWC to refill soil to (0-1)")]
		public double Refull_Frac { get; set; }
		[Description("% PAWC to trigger irrigation (0-1)")]
		public double Trigger_Frac { get; set; }
		[Description("Minimum days for irrigation to return")]
		public double Return_days { get; set; }
		[Description("Maximum irrigation application (mm)")]
		public double Maximum_Irrigation_Amount { get; set; }
		[Description("Depth to calculate PAWC (mm)")]
		public double Top_Depth { get; set; }
	   
		//Class members
		[XmlIgnore] private bool IrrigationIsAvailable { get; set; }
		[XmlIgnore] public bool SeasonIsOpen { get; set; }
		[XmlIgnore] private bool CropIsActive { get; set; }
		[XmlIgnore] private bool IrrigatorIsAvailable { get; set; }
		[XmlIgnore] private bool SoilIsDry { get; set; }
		[XmlIgnore] public double Top_DUL { get; set; }
		[XmlIgnore] public double Top_Refull { get; set; }
		[XmlIgnore] public double Top_Trigger { get; set; }
		[XmlIgnore] public double Top_LL { get; set; }
		[XmlIgnore] public double Top_SW { get; set; }
		[XmlIgnore] public double Accumulated_depth { get; set; }
		[XmlIgnore] public double Days_since_irrigation { get; set; }
		[XmlIgnore] public double Amount_to_apply { get; set; }
		[XmlIgnore] public double Season_Application { get; set; }
		[XmlIgnore] public double Top_PAWC { get; set; }
		
		//Variables for date logic testing
		[XmlIgnore] public string StartString { get; set; }
		[XmlIgnore] public string EndString { get; set; }
		[XmlIgnore] public DateTime StartDate { get; set; }
		[XmlIgnore] public DateTime EndDate { get; set; }
		[XmlIgnore] public int TodayYear { get; set; }
		[XmlIgnore] public int TodayMonth { get; set; }
		[XmlIgnore] public int StartMonth { get; set; }
		[XmlIgnore] public int EndMonth { get; set; }
		[XmlIgnore] public int TodayDay { get; set; }
		[XmlIgnore] public int StartDay { get; set; }
		[XmlIgnore] public int EndDay { get; set; }
	   
	
		//Calculate static soil variables
		[EventSubscribe("StartOfSimulation")]
		private void OnStartOfSimulation(object sender, EventArgs e)
		{   
			//Calculated soil water variables
			Accumulated_depth = 0;
			for (int layer = 0; Accumulated_depth < Top_Depth; layer++)
			{
				Top_LL += Soil.SoilWater.LL15mm[layer];
				Top_DUL += Soil.SoilWater.DULmm[layer];
				Top_PAWC += (Soil.SoilWater.DULmm[layer] - Soil.SoilWater.LL15mm[layer]);
				Accumulated_depth += Soil.SoilWater.Thickness[layer];
			}
			Top_Refull = Top_LL + (Top_DUL - Top_LL) * Refull_Frac;
		}
	   
	  
		//Determine daily requirement for irrigation
		[EventSubscribe("StartOfDay")]
		private void OnStartOfDay(object sender, EventArgs e)
		{ 
			//Reset irriation use at the start of the season
			if ((Clock.Today.Month == 7) && (Clock.Today.Day == 1))
			{
				Season_Application = 0;
			}
			
			//Can we irrigate?
			IrrigationIsAvailable = false; 
			if (Irrigation_Yes_No == "yes")
				IrrigationIsAvailable = true; 
	
			//Are we Allowed to Irrigate?
			TodayYear = Clock.Today.Year;
			StartString = Season_Start + "-" + TodayYear.ToString();
			EndString = Season_End + "-" + TodayYear.ToString();
			StartDate = DateTime.Parse(StartString);
			EndDate = DateTime.Parse(EndString);
			TodayMonth = Clock.Today.Month;
			TodayDay = Clock.Today.Day;
			StartDay = StartDate.Day;
			StartMonth = StartDate.Month;
			EndDay = EndDate.Day;
			EndMonth = EndDate.Month;
		  
			SeasonIsOpen = false;
			//if we are in the spring and after the start date then yes
			if ((Clock.Today.Month > 6) && (Clock.Today >= StartDate))
				SeasonIsOpen = true;
			//if we are in the autumn and before the end date then yes
			if ((Clock.Today.Month <= 6) && (Clock.Today <= EndDate))
				SeasonIsOpen = true;
		  	
			//Is the irrigator available?
			IrrigatorIsAvailable = false;
			Days_since_irrigation += 1;
			if (Days_since_irrigation >= Return_days)
				IrrigatorIsAvailable = true;
	      
			//Is the soil dry enough to require irrigation?
			SoilIsDry = false;
			double CurrentRootDepth = 0;
			double RootDepth = SLURP.Root.Depth;
			CurrentRootDepth = Math.Max(RootDepth, CurrentRootDepth);
	      
			double RelativeRootDepth = Math.Min(1.0, CurrentRootDepth / Top_Depth);
			//Top_Trigger = Math.Min(Top_Refull, Top_DUL - (Top_DUL - Top_LL) * RelativeRootDepth * (1 - Trigger_Frac)); 
			Top_Trigger = Top_LL + (Top_DUL - Top_LL) * Trigger_Frac; 
	        
			Accumulated_depth = 0;
			Top_SW = 0;
			for (int layer = 0; Accumulated_depth < Top_Depth; layer++)
			{
				Top_SW += Soil.SoilWater.SWmm[layer];
				Accumulated_depth += Soil.SoilWater.Thickness[layer];
			}
			double Top_SWThisAfternoon = Top_SW - Soil.SoilWater.Eo;
			if (Top_SWThisAfternoon <= Top_Trigger)
				SoilIsDry = true;
	            
			//Lets bloody well irrigate then!!!!
			if ((IrrigationIsAvailable) && (SeasonIsOpen) && (IrrigatorIsAvailable) && (SoilIsDry)) //The conditions are rife for irrigation
			{
				Amount_to_apply = Math.Min(Top_Refull - (Top_SW - Soil.SoilWater.Eo), Maximum_Irrigation_Amount);
				Amount_to_apply = Math.Min(Amount_to_apply, Season_Allocation - Season_Application); 
				Amount_to_apply = Math.Max(Amount_to_apply, 0.0);
				Irrigation.Apply(Amount_to_apply);
				Days_since_irrigation = 0;
				Season_Application += Amount_to_apply;
				summary.WriteMessage(this, "Automatic Irrigation");
            
			}
		}
	    
		[EventSubscribe("Harvesting")]
		private void OnHarvesting(object sender, EventArgs e)
		{
			Season_Application = 0;
		}
	}
}
```
        Soil: SoilType=NZ_sedementary; Region=Plains; State=Canterbury; Country=New Zealand; Latitude=0; Longitude=0
          DataSource=Generic profile descriptions provided by Trevor Webb and data for functional horizions based on SWAMP project results
          Comments=Bulk density values were measured on the fine earth fraction so values entered into apsim soil are adjusted down to account for stone content (assuming stones are inert from all soil process so their mass and volume is removed from model paramaters).  SAT, DUL, LL15 and Air dry have been adjusted down to account for stone content.  OC has not been adjusted so the model will get the correct carbon and N amounts using the adjusted BD.
          Water
            Thickness  BD      AirDry  LL15   DUL      SAT     KS
            80         0.77    0.0165  0.033  0.1925   0.2365  100
            50         0.63    0.0135  0.027  0.1575   0.1935  100
            200        0.4225  0.013   0.013  0.04225  0.13    100
            670        0.2     0.008   0.008  0.022    0.1     100
            500        0.2     0.008   0.008  0.022    0.1     100
            SoilCrop SLURPSoil: LL=[0.033, 0.027, 0.013, 0.008, 0.008]; KL=[0.2, 0.2, 0.2, 0.2, 0.2]; XF=[1, 1, 1, 1, 1]
          Analysis: Thickness=[80, 50, 200, 670, 500]; PH=[6, 6, 6, 6, 6]; PHUnits=Water; BoronUnits=HotWater
          SoilWater: residueinterception=0; SummerDate=1-Oct; SummerU=9; SummerCona=4.4; WinterDate=1-Apr; WinterU=6; WinterCona=3; DiffusConst=88; DiffusSlope=35; Salb=0.13; CN2Bare=73; CNRed=20; CNCov=0.8; max_pond=0; Thickness=[80, 50, 200, 670, 500]; SWCON=[0.7, 0.7, 0.7, 0.7, 0.7]
          SoilNitrogen: fom_type=[default, manure, mucuna, lablab, shemp, stable]; fract_carb=[0.2, 0.3, 0.54, 0.57, 0.45, 0]; fract_cell=[0.7, 0.3, 0.37, 0.37, 0.47, 0.1]; fract_lign=[0.1, 0.4, 0.09, 0.06, 0.08, 0.9]; wfpsN2N2O_x=[22, 88]; wfpsN2N2O_y=[0.1, 1]
          SoilOrganicMatter: same as Tests.Factors.Soil.XL.SoilOrganicMatter
          InitialWater: PercentMethod=FilledFromTop; FractionFull=1
          Sample: NO3Units=kgha; NH4Units=kgha; SWUnits=Volumetric; OCUnits=Total; PHUnits=Water
            Thickness  NO3  NH4
            80         25   1
            50         20   1
            200        15   1
            670        10   1
        Report AnnualSummary: EventNames=[Slurp].Harvesting
          VariableNames:
            [Clock].Today
            [ExtraVariables].Script.AccumEO as AccumEO
            [ExtraVariables].Script.AccumEP as AccumEP
            [ExtraVariables].Script.AccumES as AccumES
            [ExtraVariables].Script.AccumDrainage as AccumDrainage
            [ExtraVariables].Script.AccumRunoff as AccumRunoff
            [ExtraVariables].Script.AccumRainfall as AccumRainfall
            [ExtraVariables].Script.AccumIrrigation as AccumIrrigation
            [ExtraVariables].Script.MeanTemp as MeanTemp
            [ExtraVariables].Script.MeanRadn as MeanRadn
            [ExtraVariables].Script.MeanFW as MeanFW
            [IrrigationControl].Script.Top_PAWC as PAWC_60
  Experiment LandP
    Memo
      In this test we run Slurp against a dataset of Soil water content measured over 3 years under lucerne with different irrigation treatments applied.  Slurp was able to reproduce the tempeoral patterns of the 4 different irrigation treatments with adequate accuracy.
    Factors
      Factor Irrigation
        Factor TwoPerWeek
          Specifications:
            [IrrigationEvents]
            [SetCropVariables].Script.Irrigation = High
          Operations IrrigationEvents
            2011-11-07  [Irrigation].Apply(30);
            2011-11-25  [Irrigation].Apply(13.6);
            2011-11-28  [Irrigation].Apply(20.1);
            2011-11-29  [Irrigation].Apply(16.4);
            2011-12-05  [Irrigation].Apply(27);
            2011-12-15  [Irrigation].Apply(8);
            2011-12-26  [Irrigation].Apply(22.5);
            2011-12-29  [Irrigation].Apply(16.5);
            2012-01-05  [Irrigation].Apply(22.8);
            2012-01-09  [Irrigation].Apply(17.8);
            2012-01-12  [Irrigation].Apply(9.1);
            2012-01-16  [Irrigation].Apply(18.3);
            2012-01-19  [Irrigation].Apply(18.6);
            2012-01-23  [Irrigation].Apply(22.5);
            2012-01-30  [Irrigation].Apply(8);
            2012-02-02  [Irrigation].Apply(12);
            2012-02-07  [Irrigation].Apply(16.5);
            2012-02-09  [Irrigation].Apply(13.3);
            2012-02-13  [Irrigation].Apply(12.2);
            2012-02-20  [Irrigation].Apply(13.3);
            2012-02-23  [Irrigation].Apply(8.8);
            2012-03-29  [Irrigation].Apply(10);
            2012-04-02  [Irrigation].Apply(6.5);
            2012-04-05  [Irrigation].Apply(5);
            2012-04-10  [Irrigation].Apply(6.9);
            2012-04-26  [Irrigation].Apply(4.6);
            2012-04-30  [Irrigation].Apply(6.9);
            2012-05-03  [Irrigation].Apply(3.2);
            2012-11-01  [Irrigation].Apply(18);
            2012-11-15  [Irrigation].Apply(12);
            2012-11-22  [Irrigation].Apply(12);
            2012-11-26  [Irrigation].Apply(12);
            2012-11-29  [Irrigation].Apply(12);
            2012-12-03  [Irrigation].Apply(6);
            2012-12-06  [Irrigation].Apply(12);
            2012-12-13  [Irrigation].Apply(12);
            2012-12-17  [Irrigation].Apply(20.8);
            2012-12-20  [Irrigation].Apply(12);
            2012-12-24  [Irrigation].Apply(12);
            2012-12-27  [Irrigation].Apply(9);
            2012-12-31  [Irrigation].Apply(12);
            2013-01-03  [Irrigation].Apply(12);
            2013-01-07  [Irrigation].Apply(18);
            2013-01-10  [Irrigation].Apply(18);
            2013-01-14  [Irrigation].Apply(21);
            2013-01-21  [Irrigation].Apply(15);
            2013-01-24  [Irrigation].Apply(15);
            2013-01-28  [Irrigation].Apply(15);
            2013-01-31  [Irrigation].Apply(15);
            2013-02-04  [Irrigation].Apply(18);
            2013-02-07  [Irrigation].Apply(6);
            2013-02-11  [Irrigation].Apply(18.7);
            2013-02-14  [Irrigation].Apply(13.5);
            2013-02-18  [Irrigation].Apply(15);
            2013-02-21  [Irrigation].Apply(15);
            2013-02-25  [Irrigation].Apply(15);
            2013-02-28  [Irrigation].Apply(32);
            2013-03-07  [Irrigation].Apply(12);
            2013-03-11  [Irrigation].Apply(9);
            2013-03-14  [Irrigation].Apply(9);
            2013-03-28  [Irrigation].Apply(18);
            2013-04-04  [Irrigation].Apply(9);
            2013-04-11  [Irrigation].Apply(9);
            2013-10-24  [Irrigation].Apply(9);
            2013-10-31  [Irrigation].Apply(15);
            2013-11-04  [Irrigation].Apply(6);
            2013-11-07  [Irrigation].Apply(9);
            2013-11-11  [Irrigation].Apply(9);
            2013-11-14  [Irrigation].Apply(9);
            2013-11-18  [Irrigation].Apply(12);
            2013-11-21  [Irrigation].Apply(12);
            2013-11-25  [Irrigation].Apply(9);
            2013-12-02  [Irrigation].Apply(9);
            2013-12-05  [Irrigation].Apply(12);
            2013-12-09  [Irrigation].Apply(6);
            2013-12-12  [Irrigation].Apply(11);
            2013-12-17  [Irrigation].Apply(15);
            2013-12-23  [Irrigation].Apply(7);
            2014-01-06  [Irrigation].Apply(14);
            2014-01-09  [Irrigation].Apply(12.6);
            2014-01-13  [Irrigation].Apply(15.7);
            2014-01-16  [Irrigation].Apply(14.7);
            2014-01-20  [Irrigation].Apply(17.5);
            2014-01-23  [Irrigation].Apply(7.5);
            2014-01-30  [Irrigation].Apply(10);
            2014-02-03  [Irrigation].Apply(12);
            2014-02-05  [Irrigation].Apply(10);
            2014-02-10  [Irrigation].Apply(9);
            2014-02-17  [Irrigation].Apply(10);
            2014-02-20  [Irrigation].Apply(10);
        Factor OnePerWeek
          Specifications:
            [IrrigationEvents]
            [SetCropVariables].Script.Irrigation = Med
          Operations IrrigationEvents
            2011-11-07  [Irrigation].Apply(30);
            2011-11-25  [Irrigation].Apply(13.6);
            2011-11-29  [Irrigation].Apply(36.5);
            2011-12-15  [Irrigation].Apply(34.9);
            2011-12-29  [Irrigation].Apply(41.8);
            2012-01-05  [Irrigation].Apply(22.8);
            2012-01-12  [Irrigation].Apply(26.9);
            2012-01-19  [Irrigation].Apply(36.8);
            2012-02-02  [Irrigation].Apply(19.8);
            2012-02-09  [Irrigation].Apply(30);
            2012-02-16  [Irrigation].Apply(13);
            2012-02-23  [Irrigation].Apply(14.3);
            2012-03-29  [Irrigation].Apply(10);
            2012-04-05  [Irrigation].Apply(11.4);
            2012-04-26  [Irrigation].Apply(11.5);
            2012-05-03  [Irrigation].Apply(10.1);
            2012-11-01  [Irrigation].Apply(18);
            2012-11-15  [Irrigation].Apply(12);
            2012-11-29  [Irrigation].Apply(24);
            2012-12-13  [Irrigation].Apply(21);
            2012-12-27  [Irrigation].Apply(33);
            2013-01-10  [Irrigation].Apply(42);
            2013-01-24  [Irrigation].Apply(39);
            2013-02-07  [Irrigation].Apply(30);
            2013-02-21  [Irrigation].Apply(42);
            2013-02-28  [Irrigation].Apply(20);
            2013-03-07  [Irrigation].Apply(30);
            2013-04-04  [Irrigation].Apply(27);
            2013-04-18  [Irrigation].Apply(15);
            2013-10-24  [Irrigation].Apply(12);
            2013-11-07  [Irrigation].Apply(24);
            2013-11-21  [Irrigation].Apply(33);
            2013-12-05  [Irrigation].Apply(30);
            2013-12-19  [Irrigation].Apply(17);
            2014-01-02  [Irrigation].Apply(12.7);
            2014-01-16  [Irrigation].Apply(40.9);
            2014-01-30  [Irrigation].Apply(35);
            2014-02-13  [Irrigation].Apply(25);
            2014-02-27  [Irrigation].Apply(32);
        Factor ThreeWeekly
          Specifications:
            [IrrigationEvents]
            [SetCropVariables].Script.Irrigation = Low
          Operations IrrigationEvents
            2011-11-07  [Irrigation].Apply(30);
            2011-11-29  [Irrigation].Apply(47.6);
            2011-12-15  [Irrigation].Apply(34.9);
            2011-12-29  [Irrigation].Apply(41.8);
            2012-01-12  [Irrigation].Apply(49.8);
            2012-01-26  [Irrigation].Apply(36.8);
            2012-02-09  [Irrigation].Apply(49.6);
            2012-02-23  [Irrigation].Apply(34.3);
            2012-04-05  [Irrigation].Apply(21.4);
            2012-05-03  [Irrigation].Apply(23.7);
            2012-11-01  [Irrigation].Apply(18);
            2012-11-22  [Irrigation].Apply(12);
            2012-12-13  [Irrigation].Apply(27);
            2013-01-03  [Irrigation].Apply(42);
            2013-01-24  [Irrigation].Apply(45);
            2013-02-14  [Irrigation].Apply(90.6);
            2013-02-28  [Irrigation].Apply(20);
            2013-03-07  [Irrigation].Apply(30);
            2013-03-28  [Irrigation].Apply(18);
            2013-04-18  [Irrigation].Apply(15);
            2013-10-24  [Irrigation].Apply(12);
            2013-11-14  [Irrigation].Apply(33);
            2013-12-05  [Irrigation].Apply(36);
            2014-01-16  [Irrigation].Apply(44.7);
            2014-02-05  [Irrigation].Apply(33.5);
            2014-02-27  [Irrigation].Apply(32);
        Factor None
          Specifications:
            [IrrigationEvents]
            [SetCropVariables].Script.Irrigation = Rain
          Operations IrrigationEvents
            2013-02-28  [Irrigation].Apply(20);
      Factor Cover
        Factor Lucerne
          Specifications:
            [SlurpSowingRule].Script.SowingDate=2011-03-10
            [SlurpSowingRule].Script.CultivarName=Lucerne
            [SetCropVariables].Script.MaximumHeight = 600
            [SetCropVariables].Script.Cover = Lucerne
        Factor Pasture
          Specifications:
            [SlurpSowingRule].Script.SowingDate=2011-03-24
            [SlurpSowingRule].Script.CultivarName=Pasture
            [SetCropVariables].Script.MaximumHeight = 400
            [SetCropVariables].Script.Cover = Ryegrass
    Simulation LandPBase: Area=0; Slope=0
      Weather: FileName=%root%\Examples\WeatherFiles\lincoln.met
      Clock: StartDate=2011-03-01; EndDate=2014-05-01
      Summary
      SoilArbitrator Soil Arbitrator
      Zone Field: Area=0; Slope=0
        Soil: Latitude=0; Longitude=0
          Analysis: Thickness=[100, 200, 300, 300, 300, 300]; PH=[6.6, 6.2, 5.7, 5.5, 5.5, 5.5]; PHUnits=Water; BoronUnits=HotWater
          InitialWater Initial water: PercentMethod=EvenlyDistributed; FractionFull=1
          Water
            Thickness  BD   AirDry  LL15  DUL   SAT
            150        1.2  0.05    0.1   0.33  0.5
            150        1.2  0.1     0.1   0.33  0.5
            100        1.2  0.12    0.12  0.31  0.44
            200        1.2  0.06    0.06  0.15  0.46
            200        1.2  0.04    0.04  0.1   0.44
            200        1.2  0.02    0.02  0.06  0.44
            200        1.2  0.06    0.06  0.15  0.46
            200        1.2  0.04    0.04  0.1   0.44
            200        1.2  0.06    0.06  0.13  0.44
            200        1.2  0.06    0.06  0.13  0.44
            200        1.2  0.06    0.06  0.13  0.44
            200        1.2  0.06    0.06  0.13  0.44
            400        1.2  0.06    0.06  0.13  0.44
            SoilCrop SlurpSoil
              LL=[0.1, 0.1, 0.12, 0.06, 0.04, 0.02, 0.06, 0.04, 0.06, 0.06, 0.06, 0.06, 0.06]
              KL=[0.06, 0.06, 0.06, 0.06, 0.06, 0.06, 0.06, 0.06, 0.06, 0.06, 0.06, 0.06, 0.06]
              XF=[1, 1, 1, 1, 1, 1, 1, 1, 1, 1, 1, 1, 1]
          SoilWater: residueinterception=0; SummerDate=1-Nov; SummerU=9; SummerCona=4.4; WinterDate=1-Apr; WinterU=9; WinterCona=4.4; DiffusConst=88; DiffusSlope=35.4; Salb=0.18; CN2Bare=68; CNRed=20; CNCov=0.8; slope=0; discharge_width=0; catchment_area=0; max_pond=0
            Thickness  SWCON  KLAT
            150        0.55   0
            150        0.55   0
            100        0.55   0
            200        0.55   0
            200        0.55   0
            200        0.55   0
            200        0.55   0
            200        0.55   0
            200        0.55   0
            200        0.55   0
            200        0.55   0
            200        0.55   0
            400        0.55   0
          SoilNitrogen: same as SlurpTestBase.Field.Soil.SoilNitrogen
          SoilOrganicMatter: same as SlurpTestBase.Field.Soil.SoilOrganicMatter
          Sample Initial nitrogen: NO3Units=kgha; NH4Units=ppm; SWUnits=Volumetric; OCUnits=Total; PHUnits=Water
            Thickness  NO3  NH4
            100        217  0
            200        30   0
            300        5    0
            300        5    0
            300        0    0
            300        0    0
        Plant Slurp: CropType=Slurp
        MicroClimate: same as SlurpTestBase.Field.MicroClimate
        Irrigation
        Fertiliser
        SurfaceOrganicMatter surface organic matter: same as SlurpTestBase.Field.surface organic matter
        Operations IrrigationEvents
          1998-10-02  [Irrigation].Apply(40);
          1998-10-26  [Irrigation].Apply(70);
          1998-12-15  [Irrigation].Apply(70);
          1998-12-29  [Irrigation].Apply(10);
          1998-12-30  [Irrigation].Apply(55);
          1999-01-07  [Irrigation].Apply(50);
          1999-01-21  [Irrigation].Apply(40);
          1999-02-10  [Irrigation].Apply(28);
          1999-02-19  [Irrigation].Apply(15);
          1999-03-09  [Irrigation].Apply(25);
          1998-12-29  [Fertiliser].Apply(150, Fertiliser.Types.UreaN, 10);
          2011-11-07  [Irrigation].Apply(30);
          2011-11-25  [Irrigation].Apply(13.6);
          2011-11-28  [Irrigation].Apply(20.1);
        Manager ExtraVariables
```csharp
using System;
using Models.Core;
using System.Collections.Generic;
using System.Text;
using Models.Soils;
using Models.PMF;
using Models;
using System.Xml.Serialization;
using APSIM.Shared.Utilities;

namespace Models
{
	[Serializable] 
	public class Script : Model
	{
		[Link] Clock Clock;
		[Link] Soils.Soil Soil;
		[Link] Models.SurfaceOM.SurfaceOrganicMatter SOM;
		[Link] Weather Met;
		[Link] Fertiliser Fert;
		[Link] Irrigation Irrig;
		[Link] Plant Slurp;
		[Link] Zone zone;
					
		[XmlIgnore] public bool InitialDay { get; set; }
	
		
		[XmlIgnore] public double AccumEO { get; set; }
		[XmlIgnore] public double AccumEP { get; set; }
		[XmlIgnore] public double AccumES { get; set; }
		[XmlIgnore] public double AccumDrainage { get; set; }
		[XmlIgnore] public double AccumRunoff { get; set; }
		[XmlIgnore] public double AccumOutflowLat { get; set; }
		[XmlIgnore] public double AccumIrrigation { get; set; }
		[XmlIgnore] public double AccumRainfall { get; set; }
		[XmlIgnore] public double SoilWaterDeficit { get; set; }
	
		[XmlIgnore] public double OutFlowLat { get; set; }

		[EventSubscribe("Commencing")]
		private void OnSimulationCommencing(object sender, EventArgs e)
		{
			InitialDay = true;
		}
		
		[EventSubscribe("DoManagement")]
		private void OnDoManagement(object sender, EventArgs e)
		{
			//!!!!!! Water balance components !!!!!!
			//!!!!!!^^^^^^^^^^^^^^^^^^^^^^^^^^!!!!!!

			AccumIrrigation += Irrig.IrrigationApplied;
			AccumRainfall += Met.Rain;
			AccumEP -= (double)zone.Get("Slurp.Root.WaterUptake");
			double OutFlowLat = MathUtilities.Sum(Soil.SoilWater.outflow_lat);
			AccumOutflowLat -= OutFlowLat;
		}
		
		[EventSubscribe("DoManagementCalculations")]
		private void OnDoManagementCalculations(object sender, EventArgs e)
		{
			AccumEO -= Soil.SoilWater.Eo;
			AccumES -= Soil.SoilWater.Es; 
			AccumDrainage -= Soil.SoilWater.Drainage;
			AccumRunoff -= Soil.SoilWater.Runoff;
		}
	}
}
```
        Manager SlurpSowingRule
          CultivarName = Lucerne
          InitialRootDepth = 15
          SowingDate = 2011-03-14
          script: same as in SlurpTestBase.Field.SlurpSowingRule
        Report: EventNames=[Clock].DoReport
          VariableNames:
            [Clock].Today
            [Soil].SoilWater.Eo
            [Soil].SoilWater.Es
            [ExtraVariables].Script.SWC
            [ExtraVariables].Script.DUL
            [Soil].SoilWater.Drainage
            [Soil].SoilWater.Runoff
            [ExtraVariables].Script.OutFlowLat
            [Soil].SoilWater.pond
            [ExtraVariables].Script.AccumEO
            [ExtraVariables].Script.AccumEP
            [ExtraVariables].Script.AccumES
            [ExtraVariables].Script.AccumDrainage
            [ExtraVariables].Script.AccumRunoff
            [ExtraVariables].Script.AccumRainfall
            [ExtraVariables].Script.AccumIrrigation
            [ExtraVariables].Script.AccumOutflowLat
            [ExtraVariables].Script.SoilWaterDeficit
            [Slurp].Root.WaterSupply
            [Slurp].Root.WaterUptake
            [Slurp].Leaf.Transpiration
            [Slurp].Leaf.WaterDemand
            [Slurp].Root.Depth
            [Slurp].Leaf.CoverTotal
            [Slurp].Leaf.LAI
            [Slurp].Leaf.Height
            [Soil].SoilWater.SW
            [MicroClimate].net_radn
            [MicroClimate].peta
            [MicroClimate].petr
            [SetLAIofCrop].Script.leaflai
            sum([Soil].SoilWater.SWmm[1:9]) as PSWC
            SetCropVariables.Script.Treatment
            SetCropVariables.Script.CoverRead
            SetCropVariables.Script.Cover as Cover
        Manager SetCropVariables
          CoverFile = %root%\Prototypes\PMFSlurp\ShallowSoilTest\CoverInterpolated.csv
          Ext_coef = 0.8
          MaximumHeight = 600
          Cover =
          Irrigation =
          Treatment =
          leaflai = 0
```csharp
using System;
using Models.Core;
using System.Collections.Generic;
using System.Text;
using Models.PMF;
using Models;
using System.Xml.Serialization;
using APSIM.Shared.Utilities;
using System.Data;

namespace Models
{
	[Serializable] 
	//[System.Xml.Serialization.XmlInclude(typeof(Model))]
	public class Script : Model
	{
		[Link] Plant SCUM;
		[Link] Clock Clock;
		[Link] Zone zone;
		[Link] Simulation Simulation;
		
		[Description("File of Yields")]
		public string CoverFile { get; set; }
		[Description("Extinction coefficient")]
		public  double Ext_coef { get; set; }
		[Description("Maximum height of the crop at full cover")]
		public double MaximumHeight { get; set; }
		
		[XmlIgnore] private DataTable Covers { get; set; }

		public string Cover { get; set; }
		public string Irrigation { get; set; }
		public string Treatment { get; set; }
		
		private double CoverRead { get; set; }
		public double leaflai { get; private set; }
				
		[EventSubscribe("StartOfSimulation")]
		private void OnStartOfSimulation(object sender, EventArgs e)
		{
			
			Treatment = Cover + "_" + Irrigation;
			
			string fullFileName = PathUtilities.GetAbsolutePath(CoverFile, Simulation.FileName);
            
			ApsimTextFile textFile = new ApsimTextFile();
			textFile.Open(fullFileName);
			Covers = textFile.ToTable();
			textFile.Close();
		}
		
		[EventSubscribe("StartOfDay")]
		private void OnStartOfDay(object sender, EventArgs e)
		{
			foreach (DataRow row in Covers.Rows)
			{
				DateTime TodayDate = Convert.ToDateTime(row["Date"]);
				if (TodayDate.Date == Clock.Today.Date)
				{
					CoverRead = Convert.ToDouble(row[Treatment]);
				}
			}
		
			if ((bool)zone.Get("Slurp.IsAlive") == true)
			{
				//Only assign cover valuse if crop is emerged
				
				if (CoverRead == 1)
					leaflai = Math.Log(0.01) / -Ext_coef;
				else
				{
					if (CoverRead > 0)
						leaflai = Math.Log(1 - CoverRead) / -Ext_coef;
					else
						leaflai = 0;
				}
				//Summary.WriteMessage(this, "LAI " + leaflai);
				object LAIResetValue = leaflai;
				zone.Set("Slurp.Leaf.LAIFunction.Value", LAIResetValue);  
				object HeightResetValue = CoverRead * MaximumHeight;
				zone.Set("Slurp.Leaf.HeightFunction.Value", HeightResetValue);  
			}
		}
	}
}
```
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