Simulations: Version=199
  DataStore
    ExcelInput: FileNames=[ausfarm_test_clover.xlsx]; SheetNames=[Growth]
    ExcelInput ExcelInput1: FileNames=[ausfarm_test_clover.xlsx]; SheetNames=[Masses]
  Simulation Base
    Weather: FileName=Hamilton.txt
    Clock: Start=1990-05-01; End=1999-02-03
    Summary summaryfile
    SoilArbitrator Soil Arbitrator
    MicroClimate: a_interception=0; b_interception=1; c_interception=0; d_interception=0; SoilHeatFluxFraction=0.4; MinimumHeightDiffForNewLayer=0; NightInterceptionFraction=0.5; ReferenceHeight=2
    Zone Paddock: Area=1; Slope=0; AspectAngle=0; Altitude=50
      Manager PastureOverrides
        OverrideNutrient = False
        OverrideWater = False
        OverrideWaterUptake = False
        OverrideWaterDemand = True
        OverrideNUptake = True
```csharp
using Models.Soils;
using System;
using System.Linq;
using Models.Core;
using System.Collections.Generic;
using System.Text;
using System.IO;
using Models.PMF;
using Models;
using System.Xml.Serialization;
using APSIM.Shared.Utilities;
using System.Data;
using Models.PMF.Interfaces;
using Models.Surface;
using Models.Soils.Nutrients;
using Models.GrazPlan;
using Models.Soils.Arbitrator;
using Models.WaterModel;

namespace Models
{
    [Serializable] 
    public class Script : Model
    {
        [Link] Clock clock;
        [Link] Simulation simulation;
        [Link] Pasture pasture;
        [Link(ByName=true)] ISolute no3;
        [Link(ByName=true)] ISolute nh4;
        [Link] WaterBalance waterBalance;
        [Link] Water water;
                
        private DataTable ausfarmValues;
        private double[][] transpiration = new double[4][];
        
        [Description("Override nutrient model?")]
        public bool OverrideNutrient { get; set; }
        
        [Description("Override water balance model?")]
        public bool OverrideWater { get; set; }        

        [Description("Override pasture water uptake?")]
        public bool OverrideWaterUptake { get; set; }
        
        [Description("Override Potential EP from MicroClimate?")]
        public bool OverrideWaterDemand { get; set; }
        
        [Description("Override NUptake from SoilArbitrator?")]
        public bool OverrideNUptake { get; set; }

        [EventSubscribe("StartOfSimulation")]
        private void OnStartOfSimulation(object sender, EventArgs e)
        {
            //System.Diagnostics.Debugger.Break();
            string fileName = Path.Combine(Path.GetDirectoryName(simulation.FileName), "ausfarm-values.csv");
            if (File.Exists(fileName))
                ausfarmValues = DataTableUtilities.ReadDataTable(fileName, ',');
            transpiration[0] = new double[51];
            transpiration[1] = new double[51];
            transpiration[2] = new double[51];
            transpiration[3] = new double[51];
        }
        
        [EventSubscribe("DoWaterArbitration")]
        private void OnDoWaterArbitration(object sender, EventArgs e)
        {
            if (ausfarmValues != null)
            {
                if (OverrideNutrient)
                {
                    no3.kgha = GetValues(ausfarmValues, clock.Today, "NO3");
                    nh4.kgha = GetValues(ausfarmValues, clock.Today, "NH4");
                }
                if (OverrideWater)
                {
                    waterBalance.SW = GetValues(ausfarmValues, clock.Today, "SW");
                    water.Volumetric = GetValues(ausfarmValues, clock.Today, "SW");
                }
                if (OverrideWaterUptake)
                {
                    int numLayers = no3.kgha.Length;
                    Array.Copy(GetValues(ausfarmValues, clock.Today, "Transpiration1"), 0, transpiration[1], 1, numLayers);
                    Array.Copy(GetValues(ausfarmValues, clock.Today, "Transpiration2"), 0, transpiration[2], 1, numLayers);
                    Array.Copy(GetValues(ausfarmValues, clock.Today, "Transpiration3"), 0, transpiration[3], 1, numLayers);
                    pasture.SetTranspiration(transpiration);
                }
            }
            pasture.UseAusfarmWaterDemand = OverrideWaterDemand;
            pasture.UseAusfarmNUptake = OverrideNUptake;
        }
        
        private static double[] GetValues(DataTable dt, DateTime d, string variableName)
        {
            DataView view = new DataView(dt);
            view.RowFilter = $"date=#{d:MM/dd/yyyy}# and variable='{variableName}'";
            if (view.Count != 1)
                throw new Exception($"Cannot find observed value for condition {view.RowFilter}");
            List<double> values = new();
            for (int colIndex = 2; colIndex < dt.Columns.Count; colIndex++)
                values.Add(Convert.ToDouble(view[0][colIndex]));
            return values.ToArray();
        }
    }
}
```
      Manager Sowing (disabled)
        InitialRootDepth = 10
        Cultivar = Booma
        SowingDate = 10/01/2009 00:00:00
```csharp
using Models.Soils;
using System;
using System.Linq;
using Models.Core;
using System.Collections.Generic;
using System.Text;
using Models.PMF;
using Models;
using System.Xml.Serialization;
using APSIM.Shared.Utilities;
using System.Data;
using Models.PMF.Interfaces;
using Models.Surface;

namespace Models
{
    [Serializable] 
    //[System.Xml.Serialization.XmlInclude(typeof(Model))]
    public class Script : Model
    {
        [Link] Plant Barley;
        [Link] Clock Clock;
        [Link] Zone zone;
        [Link] Simulation Simulation;
        [Link] SurfaceOrganicMatter SurfOM;
        
                
        [Description("Initial Root Depth")]
        public double InitialRootDepth { get; set; }
        [Description("Cultivar name")]
        public string Cultivar { get; set; }
        [Description("Sowing Date")]
        public DateTime SowingDate { get; set; }
        
        
        [EventSubscribe("DoManagement")]
        private void OnDoManagement(object sender, EventArgs e)
        {
            if (Clock.Today.Date == SowingDate)
            {
                Barley.Sow(cultivar: Cultivar, population: 280, depth: InitialRootDepth, rowSpacing: 150);
                
            }
        }
    }
}
```
      Operations IrrigationEvents
        2009-11-11  [Irrigation].Apply(20);
        2009-11-19  [Irrigation].Apply(25);
        2009-11-26  [Irrigation].Apply(25);
        2009-12-11  [Irrigation].Apply(20);
        2009-12-21  [Irrigation].Apply(35);
        2009-12-29  [Irrigation].Apply(40);
        2010-01-05  [Irrigation].Apply(35);
        2010-01-13  [Irrigation].Apply(30);
        2010-03-02  [Irrigation].Apply(40);
        2010-03-03  [Irrigation].Apply(40);
      Operations FertiliserEvents
        2009-11-23  [Fertiliser].Apply(150, "NO3N",10);
      Soil Clay (Dunkeld No632-YP): SoilType=Clay; Site=Dunkeld; NearestTown=Dunkeld; Region=South West; State=Victoria; Country=Australia; ApsoilNumber=632-YP; Latitude=-37.649; Longitude=142.342; LocationAccuracy=Regional Soil Type; YearOfSampling=0; DataSource=YP. Data provided by Tim Johnston (DPI Vic)
        Comments=Clay - Wheat CLL measured, Barley estimated; OC & pH estimated for all laters;
        Physical
          Thickness  BD     AirDry  LL15  DUL    SAT
          100        0.93   0.035   0.07  0.25   0.619
          100        1.3    0.16    0.2   0.4    0.479
          200        1.281  0.2     0.2   0.437  0.487
          200        1.33   0.2     0.2   0.4    0.468
          200        1.29   0.2     0.2   0.38   0.483
          200        1.39   0.2     0.2   0.36   0.445
          200        1.321  0.2     0.2   0.422  0.472
          200        1.27   0.2     0.2   0.44   0.491
          200        1.313  0.2     0.2   0.425  0.475
          BD, AirDry, LL15, DUL, SAT source: Unknown source or quality of data
          SoilCrop wheatSoil: LL=[0.07, 0.2, 0.2, 0.2, 0.21, 0.3, 0.244, 0.28, 0.316]; KL=[0.06, 0.06, 0.06, 0.06, 0.04, 0.04, 0.04, 0.02, 0.02]; XF=[1, 1, 1, 1, 1, 1, 1, 1, 1]
            LL source: Field measured and checked for sensibility
          SoilCrop barleySoil: LL=[0.07, 0.2, 0.2, 0.2, 0.21, 0.3, 0.244, 0.28, 0.316]; KL=[0.07, 0.07, 0.07, 0.07, 0.05, 0.05, 0.05, 0.03, 0.03]; XF=[1, 1, 1, 1, 1, 1, 1, 1, 1]
            LL source: Estimated based on local knowledge
          SoilCrop Sub Clover - LeuraSoil: same as Base.Paddock.Clay (Dunkeld No632-YP).Physical.wheatSoil
        WaterBalance SoilWater: SummerDate=1-Nov; SummerU=6; SummerCona=3.5; WinterDate=1-Apr; WinterU=2; WinterCona=2; DiffusConst=40; DiffusSlope=16; Salb=0.13; CN2Bare=73; CNRed=20; CNCov=0.8; PSIDul=-100; Thickness=[100, 100, 200, 200, 200, 200, 200, 200, 200]; SWCON=[0.4, 0.4, 0.3, 0.3, 0.3, 0.3, 0.25, 0.25, 0.25]
        Organic: FOMCNRatio=40; CarbonUnits=WalkleyBlack
          Thickness  Carbon  SoilCNRatio  FBiom  FInert  FOM
          100        1.05    12           0.04   0.4     284.162
          100        0.45    12           0.04   0.4     235.579
          200        0.3     12           0.02   0.6     161.911
          200        0.3     12           0.02   0.7     111.28
          200        0.25    12           0.02   0.8     76.4813
          200        0.25    12           0.02   1       52.5648
          200        0.2     12           0.01   1       36.1272
          200        0.1     12           0.01   1       24.8298
          200        0.1     12           0.01   1       17.0653
        Chemical: Thickness=[100, 100, 200, 200, 200, 200, 200, 200, 200]; PH=[8.5, 8.8, 8.9, 8.9, 8.9, 8.9, 8.9, 8.9, 8.9]; PHUnits=Water
          PH source: Estimated based on local knowledge
        Nutrient
        Solute NH4: Thickness=[100, 100, 200, 200, 200, 200, 200, 200, 200]; InitialValuesUnits=ppm; WaterTableConcentration=0; D0=0; DepthConstant=0; MaxDepthSoluteAccessible=0; RunoffEffectivenessAtMovingSolute=0; MaxEffectiveRunoff=0
        Solute NO3: Thickness=[100, 100, 200, 200, 200, 200, 200, 200, 200]; InitialValues=[30, 10, 4, 2, 1.5, 1.5, -, -, -]; InitialValuesUnits=ppm; WaterTableConcentration=0; D0=0; DepthConstant=0; MaxDepthSoluteAccessible=0; RunoffEffectivenessAtMovingSolute=0; MaxEffectiveRunoff=0
        Solute Urea: Thickness=[100, 100, 200, 200, 200, 200, 200, 200, 200]; InitialValues=[0, 0, 0, 0, 0, 0, 0, 0, 0]; InitialValuesUnits=kg/ha; WaterTableConcentration=0; D0=0; DepthConstant=0; MaxDepthSoluteAccessible=0; RunoffEffectivenessAtMovingSolute=0; MaxEffectiveRunoff=0
        Water: Thickness=[100, 100, 200, 200, 200, 200, 200, 200, 200]; InitialValues=[0.25, 0.4, 0.437, 0.4, 0.38, 0.36, 0.422, 0.44, 0.425]; FilledFromTop=false
        SoilTemperature CERESSoilTemperature
      SurfaceOrganicMatter Surface Organic Matter: InitialResidueType=Barley; InitialResidueMass=0; InitialStandingFraction=0; InitialCPR=0; InitialCNR=0
      Irrigation
      Fertiliser
      Report DailyReport: EventNames=[Clock].DoReport
        VariableNames:
          [Clock].Today
          sum([Pasture].Uptake_NH4) as NH4Uptake
          sum([Pasture].Uptake_NO3) as NO3Uptake
          sum([Pasture].SWUptake)
          [Pasture].Growth
          [Pasture].GreenDM
          [Pasture].AvailGreen
          [Pasture].AvailDM
          [Pasture].DryDM
          [Pasture].LitterDM
          [Pasture].WaterDemand
          //[Pasture].WaterDemandSupply
          (sum([Soil].Urea.kgha) + sum([Soil].NH4.kgha) + sum([Soil].NO3.kgha)) as SoilNContent_kgha
          [Pasture].GLF_GAI
          [Pasture].GLF_N
          [Pasture].GLF_Nutr
          [Pasture].GLF_SM
          [Pasture].GLF_Temp
          [Pasture].GLF_VPD
          [Pasture].GLF_WL
          sum([Water].MM) as total_water
          [Pasture].CoverGreen
          [Pasture].CoverTotal
          [Pasture].LAI
          sum([NO3].kgha) as TotalNO3
          sum([NH4].kgha) as TotalNH4
          [Pasture].PotentialEP
          sum([Pasture].SWUptake) as EP
          [Pasture].SWUptake
          [Pasture].SeedDM
          [Pasture].SeedSoftUnripe[1]
          [Pasture].SeedHardUnripe[1]
          [Pasture].SeedHardRipe[1]
          [Pasture].SeedSoftRipe[1]
          [Surface Organic Matter].Wt
          [Surface Organic Matter].N
          [Pasture].RootN
          [Pasture].N_Fixed
          [Pasture].RootProfileN
          [Pasture].RootDMProfile
          [SoilWater].LeachNO3
      Report HarvestReport: EventNames=[Clock].EndOfSimulation
        VariableNames:
          [Clock].Today
          //[Barley].AboveGroundLive.Wt
          //[Barley].Leaf.LAI
      Pasture: Species=Sub Clover - Leura; Fertility=0.8; Nutrients=N; MaxRtDep=550; LaggedDayT=-999.9; Phenology=4; FlowerLen=0; FlowerTime=0; SencIndex=0; DormIndex=0; DormT=-999.9; ExtinctCoeff=[0.65, 0.65, 0.65]; SeedDormTime=0; GermIndex=0; Albedo=0.23; Gsmax=0.011; R50=200; WaterDemand=0; LAI=0
        Seeds={soft_unripe=[0], soft_ripe=[0], hard_unripe=[0], hard_ripe=[0]}
        GreenCohortInitialise Green: RootWeight=[400, 400]; RootDepth=650; EstIndex=0; StressIndex=0; StemReloc=0; Frosts=0; Status=established; LeafDMD=[0.825]; LeafWeight=[800]; LeafNConc=[0.01]; LeafSpecificArea=[430]; StemDMD=[0.825]; StemWeight=[800]; StemNConc=[0.01]; StemSpecificArea=[10]
        DryCohortInitialise Dead: Status=dead; LeafDMD=[0.55]; LeafWeight=[1000]; LeafNConc=[0]; LeafSpecificArea=[415]; StemDMD=[0.55]; StemWeight=[1000]; StemNConc=[0]; StemSpecificArea=[100]
        DryCohortInitialise Litter: Status=litter; LeafDMD=[0.55]; LeafWeight=[101]; LeafNConc=[0]; LeafSpecificArea=[415]; StemDMD=[0.5]; StemWeight=[99]; StemNConc=[0]; StemSpecificArea=[100]
        SeedCohortInitialise: SoftUnripe=[75]; HardUnripe=[75]; HardRipe=[250]; SoftRipe=[0]
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