Simulations: Version=207
  Memo Notes
    # Notes:

    * The AusFarm directory contains all the Ausfarm simulation files (*.afs) named the same as the simulations in Pasture.apsimx.
    * To get Ausfarm output .csv files, run the simulation in AusFarm, then right click on 'Output' in Ausfarm simulation tree and export to SQLITE DB. Use ```DBBrowser for SQLite``` and export the Simulation table to a .csv file (e.g. Clover.csv).
    * AUSFARM uses tomorrows rain and evap data. I have moved the rain and evap in the weatherfile up by 1 day.
    * Line 2757 pasture.cs: FWeather[TWeatherData.wdtWind] = 0;   // AUSFARM DOESN'T HAVE DEFAULT WINDSPEED !!!!!
    * Line 2545 pasture.cs: In Ausfarm, the VPD calculation uses SVPfrac = 0.75 instead of 0.66 in APSIM (weather.cs)
    * Line 2736 pasture.cs: if (systemClock.Today != systemClock.StartDate) // Ausfarm doesn't seem to drop dead roots to soil on day 1.
    * Ausfarm doesn't take inert fraction into account when initialising humic pool
    * In Ausfarm, water uptake happens before crop growth.
    * In Ausfarm, nutrient uptake happens after crop growth.
    * Soil evaporation is different between the two models. To get near identical, comment out lines 271-275 in EvaporationModel.cs

    ```c#
        // If U has changed (due to summer / winter turn over) and infiltration is zero then reset sumes1 to U to stop
        // artificially entering stage 1 evap. GitHub Issue #8112
        if (UYesterday != U)
        {
            sumes1 = U;
            sumes2 = CONA * Math.Pow(t, 0.5);
        }
    ```

    # Process for debugging models side by side

    * Run Ausfarm simulation on Bitzer (remote desktop) from RAD Studio so that code can be debugged (Models.groupproj - RAS studio project file)
      File is: "L:\projects\ApsimX\Prototypes\Pasture\Validation\just_pasture_ryegrass.afs"
  DataStore
    Input AusfarmRyegrass: FileNames=[AusFarm/Ryegrass.csv]
    Input AusFarmClover: FileNames=[AusFarm/Clover.csv]
    Input AusFarmCloverRyegrass: FileNames=[AusFarm/CloverRyegrass.csv]
  Experiment SoilT (disabled)
    Memo
      This experiment demonstrates the difference that changing soil temperature models has on pasture growth.
    Factors
      CompositeFactor CERES
        Specifications:
          [CERESSoilTemperature].Enabled = true
          [CampbellSoilTemperature].Enabled = false
      CompositeFactor Campbell
        Specifications:
          [CERESSoilTemperature].Enabled = false
          [CampbellSoilTemperature].Enabled = true
    Simulation RyegrassBase
      Weather: FileName=AusFarm/cbr_70014.met
      Clock: Start=1990-08-01; End=1992-02-03
      Summary summaryfile
      SoilArbitrator Soil Arbitrator
      MicroClimate: a_interception=0; b_interception=1; c_interception=0; d_interception=0; SoilHeatFluxFraction=0.4; MinimumHeightDiffForNewLayer=0; NightInterceptionFraction=0.5; ReferenceHeight=2
      Zone Paddock: Area=1; Slope=4.2; AspectAngle=0; Altitude=50
        Manager ReportVariables
```csharp
using Models.Soils;
using System;
using System.Linq;
using Models.Core;
using Models.PMF;
using APSIM.Shared.Utilities;
using Models.Utilities;
using Models.Surface;
using Models.Functions;
using Models.Soils.Nutrients;

namespace Models
{
    [Serializable]
    public class Script : Model
    {
        [Link] 
        Clock Clock;
        
        [Link]
        private Nutrient nutrient;

        [Link]
        private Physical physical;
        
        [Link(Type=LinkType.Path, Path="[Nutrient].TF")] private CERESMineralisationTemperatureFactor TFFunction;

        public double[] TF
        {
            get
            {
                double[] tf = new double[physical.Thickness.Length];
                for (int i = 0; i != physical.Thickness.Length; i++)
                    tf[i] = TFFunction.Value(i);
                return tf;
            }        
        }
         
    }
}
```
        Operations IrrigationEvents
          2009-11-11  [Irrigation].Apply(20);
          2009-11-19  [Irrigation].Apply(25);
          2009-11-26  [Irrigation].Apply(25);
          2009-12-11  [Irrigation].Apply(20);
          2009-12-21  [Irrigation].Apply(35);
          2009-12-29  [Irrigation].Apply(40);
          2010-01-05  [Irrigation].Apply(35);
          2010-01-13  [Irrigation].Apply(30);
          2010-03-02  [Irrigation].Apply(40);
          2010-03-03  [Irrigation].Apply(40);
        Operations FertiliserEvents
          2009-11-23  [Fertiliser].Apply(150, "NO3N",10);
        Operations Harvest
          2010-02-23  [Barley].Harvest();
        SurfaceOrganicMatter Surface Organic Matter: InitialResidueType=grass; InitialResidueMass=10; InitialStandingFraction=0; InitialCPR=0; InitialCNR=25
        Soil: SoilType=NZ_sedementary; Region=Plains; State=Canterbury; Country=New Zealnd; Latitude=0; Longitude=0
          Chemical: PHUnits=Water
            Thickness  PH   CEC
            100        5.8  14.287
            100        5.9  10.51
            100        6.6  12.726
            150        6.8  12.501
            200        7    16.239
            200        7.1  16.059
            CEC source: Calculated
          Physical
            Thickness  ParticleSizeSand  ParticleSizeSilt  ParticleSizeClay  Rocks  BD    AirDry  LL15  DUL   SAT
            100        58                14                28                0      1.22  0.022   0.1   0.17  0.51
            100        61                20                19                0      1.45  0.028   0.13  0.19  0.42
            100        45                22                33                0      1.45  0.03    0.14  0.2   0.42
            150        45                22                33                0      1.45  0.032   0.15  0.23  0.42
            200        45                8                 47                0      1.45  0.039   0.19  0.27  0.42
            200        45                8                 47                0      1.5   0.044   0.22  0.29  0.4
            Rocks source: Calculated
            SoilCrop Perennial RyegrassSoil: LL=[0.1, 0.13, 0.14, 0.15, 0.19, 0.22]; KL=[0.07, 0.07, 0.07, 0.06, 0.04, 0]; XF=[1, 1, 1, 1, 1, 1]
          WaterBalance SoilWater: SummerDate=1-Nov; SummerU=6; SummerCona=3.5; WinterDate=1-Apr; WinterU=2; WinterCona=2; DiffusConst=0; DiffusSlope=0; Salb=0.13; CN2Bare=52; CNRed=20; CNCov=0.8; DischargeWidth=0; CatchmentArea=0; PSIDul=-100
            Thickness  SWCON  KLAT
            100        0.4    0
            100        0.4    0
            100        0.4    0
            150        0.4    0
            200        0.4    0
            200        0.4    0
          Organic: FOMCNRatio=53.5; CarbonUnits=Total
            Thickness  Carbon  SoilCNRatio  FBiom  FInert  FOM
            100        1.3     14.5         0.02   0       975
            100        0.6     14.5         0.01   0       600
            100        0.4     14.5         0.01   0       400
            150        0.3     14.5         0.006  0       150
            200        0.3     14.5         0.006  0       30
            200        0.22    14.5         0.006  0       20
          SoilTemperature CampbellSoilTemperature: Thickness=[100, 100, 100, 150, 200, 200]; InitialValues=[7.878, 8.043, 8.215, 8.48, 8.847, 9.22]
          CERESSoilTemperature
          Water: Thickness=[100, 100, 100, 150, 200, 200]; InitialValues=[0.17, 0.19, 0.2, 0.23, 0.27, 0.29]; FilledFromTop=false
          Nutrient
          Solute Urea: Thickness=[100, 100, 100, 150, 200, 200]; InitialValues=[0, 0, 0, 0, 0, 0]; InitialValuesUnits=ppm; WaterTableConcentration=0; D0=0; DepthConstant=0; MaxDepthSoluteAccessible=0; RunoffEffectivenessAtMovingSolute=0; MaxEffectiveRunoff=0
          Solute NO3: Thickness=[100, 100, 100, 150, 200, 200]; InitialValues=[30, 10, 4, 2, 1.5, 1.5]; InitialValuesUnits=ppm; WaterTableConcentration=0; D0=0; DepthConstant=0; MaxDepthSoluteAccessible=0; RunoffEffectivenessAtMovingSolute=0; MaxEffectiveRunoff=0
          Solute NH4: same as SoilT.RyegrassBase.Paddock.Soil.Urea
        Irrigation
        Fertiliser
        Report DailyReport: EventNames=[Clock].DoReport
          VariableNames:
            [Clock].Today
            [Weather].Rain
            sum([Pasture].Uptake_NH4) as NH4Uptake
            sum([Pasture].Uptake_NO3) as NO3Uptake
            sum([Pasture].SWUptake)
            [Pasture].Growth
            [Pasture].GreenDM
            [Pasture].GreenN
            [Pasture].AvailGreen
            [Pasture].AvailDM
            [Pasture].DryDM
            [Pasture].DeadDM
            [Pasture].SencDM
            [Pasture].LeafDM
            [Pasture].StemDM
            [Pasture].DeadN
            [Pasture].LitterDM
            [Pasture].Height
            [Pasture].WaterDemand
            (sum([Soil].Urea.kgha) + sum([Soil].NH4.kgha) + sum([Soil].NO3.kgha)) as SoilNContent_kgha
            [Pasture].GLF_GAI
            [Pasture].GLF_N
            [Pasture].GLF_Nutr
            [Pasture].GLF_SM
            [Pasture].GLF_Temp
            [Pasture].GLF_VPD
            [Pasture].GLF_WL
            sum([Water].MM) as total_water
            [Pasture].CoverGreen
            [Pasture].CoverTotal
            [Pasture].LAI
            [Pasture].RootDM
            [Pasture].RootDep
            sum([NO3].kgha) as TotalNO3
            sum([NH4].kgha) as TotalNH4
            [Pasture].PotentialEP
            sum([Pasture].SWUptake) as EP
            [Pasture].SWUptake
            [SurfaceOrganicMatter].Wt
            [SurfaceOrganicMatter].C
            [SurfaceOrganicMatter].N
            [SurfaceOrganicMatter].tf
            [SurfaceOrganicMatter].wf
            [SurfaceOrganicMatter].Cover
            sum([SurfaceOrganicMatter].SurfaceResidue.Decomposition.MineralisedN)
            [Nutrient].FOM.C
            [Nutrient].FOM.N
            [Nutrient].Humic.C
            [Nutrient].Humic.N
            [Nutrient].Microbial.C
            [Nutrient].Microbial.N
            [Nutrient].FOMCarbohydrate.C
            [Nutrient].FOMCellulose.C
            [Nutrient].FOMLignin.C
            [Nutrient].FOMCarbohydrate.InitialCarbon
            [Nutrient].FOMCellulose.InitialCarbon
            [Nutrient].FOMLignin.InitialCarbon
            sum([Nutrient].FOMCarbohydrate.Decomposition.MineralisedN)+sum([Nutrient].FOMCellulose.Decomposition.MineralisedN)+sum([Nutrient].FOMLignin.Decomposition.MineralisedN) as FOMMineralisation
            sum([Nutrient].Microbial.Decomposition.MineralisedN)
            sum([Nutrient].Humic.Decomposition.MineralisedN)
            [Water].MM
            [WaterBalance].CN2Bare
            [WaterBalance].WinterCona
            [WaterBalance].WinterU
            [WaterBalance].Drainage
            [WaterBalance].Eo
            [WaterBalance].Eos
            [WaterBalance].Es
            [WaterBalance].Infiltration
            [WaterBalance].Runoff
            [NO3].kgha
            [NH4].kgha
            [ISoilTemperature].AverageSoilTemperature
        Report HarvestReport: EventNames=[Clock].EndOfSimulation
          VariableNames:
            [Clock].Today
            //[Barley].AboveGroundLive.Wt
            //[Barley].Leaf.LAI
        Pasture: Species=Perennial Ryegrass; Fertility=0.8; Nutrients=N; MaxRtDep=650; LaggedDayT=-999.9; Phenology=1.0015; FlowerLen=0; FlowerTime=0; SencIndex=0; DormIndex=0; DormT=-999.9; ExtinctCoeff=[0, 10, 0]; SeedDormTime=0; GermIndex=0; Albedo=0.23; Gsmax=0.011; R50=200; WaterDemand=0; LAI=0
          GreenCohortInitialise: RootWeight=[400, 400]; RootDepth=650; EstIndex=0; StressIndex=0; StemReloc=0; Frosts=0; Status=established; LeafDMD=[0.825]; LeafWeight=[800]; LeafNConc=[0.01]; LeafSpecificArea=[430]; StemDMD=[0.825]; StemWeight=[800]; StemNConc=[0.01]; StemSpecificArea=[10]
          DryCohortInitialise: Status=established; LeafDMD=[0.6]; LeafWeight=[500]; LeafNConc=[0]; LeafSpecificArea=[430]; StemDMD=[0.35]; StemWeight=[1500]; StemNConc=[0]; StemSpecificArea=[80]
        Report TFReport: EventNames=[Clock].DoReport
          VariableNames:
            [Clock].Today
            [ReportVariables].Script.TF[1]
            sum([Nutrient].Microbial.C)
            sum([Nutrient].Microbial.N)
            sum([Nutrient].Microbial.C)/sum([Nutrient].Microbial.N) as MicrobialCNR
        Report DailyReport3: EventNames=[Clock].DoReport
          VariableNames:
            [Clock].Today
            [ISoilTemperature].AverageSoilTemperature
            [SurfaceOrganicMatter].Wt
            [SurfaceOrganicMatter].C
            [SurfaceOrganicMatter].N
            [SurfaceOrganicMatter].tf
            [SurfaceOrganicMatter].wf
            [SurfaceOrganicMatter].Cover
  Simulation Ryegrass
    Weather: FileName=AusFarm/cbr_70014.met
    Clock: Start=1990-08-01; End=1992-02-03
    Summary summaryfile
    SoilArbitrator Soil Arbitrator
    MicroClimate: a_interception=0; b_interception=1; c_interception=0; d_interception=0; SoilHeatFluxFraction=0.4; MinimumHeightDiffForNewLayer=0; NightInterceptionFraction=0.5; ReferenceHeight=2
    Zone Paddock: Area=1; Slope=4.2; AspectAngle=0; Altitude=50
      Operations IrrigationEvents
        2009-11-11  [Irrigation].Apply(20);
        2009-11-19  [Irrigation].Apply(25);
        2009-11-26  [Irrigation].Apply(25);
        2009-12-11  [Irrigation].Apply(20);
        2009-12-21  [Irrigation].Apply(35);
        2009-12-29  [Irrigation].Apply(40);
        2010-01-05  [Irrigation].Apply(35);
        2010-01-13  [Irrigation].Apply(30);
        2010-03-02  [Irrigation].Apply(40);
        2010-03-03  [Irrigation].Apply(40);
      Operations FertiliserEvents
        2009-11-23  [Fertiliser].Apply(150, "NO3N",10);
      Operations Harvest
        2010-02-23  [Barley].Harvest();
      SurfaceOrganicMatter Surface Organic Matter: InitialResidueType=Barley; InitialResidueMass=0; InitialStandingFraction=0; InitialCPR=0; InitialCNR=60
      Soil: SoilType=NZ_sedementary; Region=Plains; State=Canterbury; Country=New Zealnd; Latitude=0; Longitude=0
        Chemical: PHUnits=Water
          Thickness  PH   CEC
          100        5.8  14.287
          100        5.9  10.51
          100        6.6  12.726
          150        6.8  12.501
          200        7    16.239
          200        7.1  16.059
          CEC source: Calculated
        Physical
          Thickness  ParticleSizeSand  ParticleSizeSilt  ParticleSizeClay  Rocks  BD    AirDry  LL15  DUL   SAT
          100        58                14                28                0      1.22  0.022   0.1   0.17  0.51
          100        61                20                19                0      1.45  0.028   0.13  0.19  0.42
          100        45                22                33                0      1.45  0.03    0.14  0.2   0.42
          150        45                22                33                0      1.45  0.032   0.15  0.23  0.42
          200        45                8                 47                0      1.45  0.039   0.19  0.27  0.42
          200        45                8                 47                0      1.5   0.044   0.22  0.29  0.4
          Rocks source: Calculated
          SoilCrop Perennial RyegrassSoil: LL=[0.1, 0.13, 0.14, 0.15, 0.19, 0.22]; KL=[0.07, 0.07, 0.07, 0.06, 0.04, 0]; XF=[1, 1, 1, 1, 1, 1]
        WaterBalance SoilWater: SummerDate=1-Nov; SummerU=6; SummerCona=3.5; WinterDate=1-Apr; WinterU=2; WinterCona=2; DiffusConst=0; DiffusSlope=0; Salb=0.13; CN2Bare=52; CNRed=20; CNCov=0.8; DischargeWidth=0; CatchmentArea=0; PSIDul=-100
          Thickness  SWCON  KLAT
          100        0.4    0
          100        0.4    0
          100        0.4    0
          150        0.4    0
          200        0.4    0
          200        0.4    0
        Organic: FOMCNRatio=53.5; CarbonUnits=Total
          Thickness  Carbon  SoilCNRatio  FBiom  FInert  FOM
          100        1.3     14.5         0.02   0       975
          100        0.6     14.5         0.01   0       600
          100        0.4     14.5         0.01   0       400
          150        0.3     14.5         0.006  0       150
          200        0.3     14.5         0.006  0       30
          200        0.22    14.5         0.006  0       20
        SoilTemperature SoilTemperatureCampbell (disabled)
        CERESSoilTemperature
        Water: Thickness=[100, 100, 100, 150, 200, 200]; InitialValues=[0.17, 0.19, 0.2, 0.23, 0.27, 0.29]; FilledFromTop=false
        Nutrient
        Solute Urea: Thickness=[100, 100, 100, 150, 200, 200]; InitialValues=[0, 0, 0, 0, 0, 0]; InitialValuesUnits=ppm; WaterTableConcentration=0; D0=0; DepthConstant=0; MaxDepthSoluteAccessible=0; RunoffEffectivenessAtMovingSolute=0; MaxEffectiveRunoff=0
        Solute NO3: Thickness=[100, 100, 100, 150, 200, 200]; InitialValues=[30, 10, 4, 2, 1.5, 1.5]; InitialValuesUnits=ppm; WaterTableConcentration=0; D0=0; DepthConstant=0; MaxDepthSoluteAccessible=0; RunoffEffectivenessAtMovingSolute=0; MaxEffectiveRunoff=0
        Solute NH4: same as Ryegrass.Paddock.Soil.Urea
      Irrigation
      Fertiliser
      Report DailyReport: EventNames=[Clock].DoReport
        VariableNames:
          [Clock].Today
          [Weather].Rain
          sum([Pasture].Uptake_NH4) as NH4Uptake
          sum([Pasture].Uptake_NO3) as NO3Uptake
          sum([Pasture].SWUptake)
          [Pasture].Growth
          [Pasture].GreenDM
          [Pasture].GreenN
          [Pasture].AvailGreen
          [Pasture].AvailDM
          [Pasture].DryDM
          [Pasture].DeadDM
          [Pasture].SencDM
          [Pasture].LeafDM
          [Pasture].StemDM
          [Pasture].DeadN
          [Pasture].LitterDM
          [Pasture].Height
          [Pasture].WaterDemand
          (sum([Soil].Urea.kgha) + sum([Soil].NH4.kgha) + sum([Soil].NO3.kgha)) as SoilNContent_kgha
          [Pasture].GLF_GAI
          [Pasture].GLF_N
          [Pasture].GLF_Nutr
          [Pasture].GLF_SM
          [Pasture].GLF_Temp
          [Pasture].GLF_VPD
          [Pasture].GLF_WL
          sum([Water].MM) as total_water
          [Pasture].CoverGreen
          [Pasture].CoverTotal
          [Pasture].LAI
          [Pasture].RootDM
          [Pasture].RootDep
          sum([NO3].kgha) as TotalNO3
          sum([NH4].kgha) as TotalNH4
          [Pasture].PotentialEP
          sum([Pasture].SWUptake) as EP
          [Pasture].SWUptake
          [SurfaceOrganicMatter].Wt
          [SurfaceOrganicMatter].C
          [SurfaceOrganicMatter].N
          [SurfaceOrganicMatter].tf
          [SurfaceOrganicMatter].wf
          [SurfaceOrganicMatter].Cover
          sum([SurfaceOrganicMatter].SurfaceResidue.Decomposition.MineralisedN)
          [Nutrient].FOM.C
          [Nutrient].FOM.N
          [Nutrient].Humic.C
          [Nutrient].Humic.N
          [Nutrient].Microbial.C
          [Nutrient].Microbial.N
          [Nutrient].FOMCarbohydrate.C
          [Nutrient].FOMCellulose.C
          [Nutrient].FOMLignin.C
          [Nutrient].FOMCarbohydrate.InitialCarbon
          [Nutrient].FOMCellulose.InitialCarbon
          [Nutrient].FOMLignin.InitialCarbon
          sum([Nutrient].FOMCarbohydrate.Decomposition.MineralisedN)+sum([Nutrient].FOMCellulose.Decomposition.MineralisedN)+sum([Nutrient].FOMLignin.Decomposition.MineralisedN as FOMMineralisation)
          sum([Nutrient].Microbial.Decomposition.MineralisedN)
          sum([Nutrient].Humic.Decomposition.MineralisedN)
          [Water].MM
          [WaterBalance].CN2Bare
          [WaterBalance].WinterCona
          [WaterBalance].WinterU
          [WaterBalance].Drainage
          [WaterBalance].Eo
          [WaterBalance].Eos
          [WaterBalance].Es
          [WaterBalance].Infiltration
          [WaterBalance].Runoff
          [NO3].kgha
          [NH4].kgha
          [Pasture].Leaf.Wt
      Report HarvestReport: EventNames=[Clock].EndOfSimulation
        VariableNames:
          [Clock].Today
          //[Barley].AboveGroundLive.Wt
          //[Barley].Leaf.LAI
      Pasture: Species=Perennial Ryegrass; Fertility=0.8; Nutrients=N; MaxRtDep=650; LaggedDayT=-999.9; Phenology=1.0015; FlowerLen=0; FlowerTime=0; SencIndex=0; DormIndex=0; DormT=-999.9; ExtinctCoeff=[0, 10, 0]; SeedDormTime=0; GermIndex=0; Albedo=0.23; Gsmax=0.011; R50=200; WaterDemand=0; LAI=0
        GreenCohortInitialise: RootWeight=[400, 400]; RootDepth=650; EstIndex=0; StressIndex=0; StemReloc=0; Frosts=0; Status=established; LeafDMD=[0.825]; LeafWeight=[800]; LeafNConc=[0.01]; LeafSpecificArea=[430]; StemDMD=[0.825]; StemWeight=[800]; StemNConc=[0.01]; StemSpecificArea=[10]
        DryCohortInitialise: Status=established; LeafDMD=[0.6]; LeafWeight=[500]; LeafNConc=[0]; LeafSpecificArea=[430]; StemDMD=[0.35]; StemWeight=[1500]; StemNConc=[0]; StemSpecificArea=[80]
        Organs Leaf
  Simulation Clover (disabled)
    Weather: FileName=AusFarm/Hamilton.txt
    Clock: Start=1990-01-01; End=1999-02-03
    Summary summaryfile
    SoilArbitrator Soil Arbitrator
    MicroClimate: a_interception=0; b_interception=1; c_interception=0; d_interception=0; SoilHeatFluxFraction=0.4; MinimumHeightDiffForNewLayer=0; NightInterceptionFraction=0.5; ReferenceHeight=2
    Zone Paddock: Area=1; Slope=0; AspectAngle=0; Altitude=50
      Manager Sowing
        InitialRootDepth = 10
        Cultivar = Booma
        SowingDate = 10/01/2009 00:00:00
```csharp
using Models.Soils;
using System;
using System.Linq;
using Models.Core;
using System.Collections.Generic;
using System.Text;
using Models.PMF;
using Models;
using System.Xml.Serialization;
using APSIM.Shared.Utilities;
using System.Data;
using Models.PMF.Interfaces;
using Models.Surface;

namespace Models
{
    [Serializable] 
    //[System.Xml.Serialization.XmlInclude(typeof(Model))]
    public class Script : Model
    {
        [Link] Plant Barley;
        [Link] Clock Clock;
        [Link] Zone zone;
        [Link] Simulation Simulation;
        [Link] SurfaceOrganicMatter SurfOM;
        
                
        [Description("Initial Root Depth")]
        public double InitialRootDepth { get; set; }
        [Description("Cultivar name")]
        public string Cultivar { get; set; }
        [Description("Sowing Date")]
        public DateTime SowingDate { get; set; }
        
        
        [EventSubscribe("DoManagement")]
        private void OnDoManagement(object sender, EventArgs e)
        {
            if (Clock.Today.Date == SowingDate)
            {
                Barley.Sow(cultivar: Cultivar, population: 280, depth: InitialRootDepth, rowSpacing: 150);
                
            }
        }
    }
}
```
      Operations IrrigationEvents: same as SoilT.RyegrassBase.Paddock.IrrigationEvents
      Operations FertiliserEvents
        2009-11-23  [Fertiliser].Apply(150, "NO3N",10);
      Soil Clay (Dunkeld No632-YP): SoilType=Clay; Site=Dunkeld; NearestTown=Dunkeld; Region=South West; State=Victoria; Country=Australia; ApsoilNumber=632-YP; Latitude=-37.649; Longitude=142.342; LocationAccuracy=Regional Soil Type; YearOfSampling=0; DataSource=YP. Data provided by Tim Johnston (DPI Vic)
        Comments=Clay - Wheat CLL measured, Barley estimated; OC & pH estimated for all laters;
        Physical
          Thickness  ParticleSizeSand  ParticleSizeSilt  ParticleSizeClay  Rocks  BD     AirDry  LL15  DUL    SAT
          100        5                 65                30                0      0.93   0.035   0.07  0.25   0.619
          100        5                 65                30                0      1.3    0.16    0.2   0.4    0.479
          200        5                 65                30                0      1.281  0.2     0.2   0.437  0.487
          200        5                 65                30                0      1.33   0.2     0.2   0.4    0.468
          200        5                 65                30                0      1.29   0.2     0.2   0.38   0.483
          200        5                 65                30                0      1.39   0.2     0.2   0.36   0.445
          200        5                 65                30                0      1.321  0.2     0.2   0.422  0.472
          200        5                 65                30                0      1.27   0.2     0.2   0.44   0.491
          200        5                 65                30                0      1.313  0.2     0.2   0.425  0.475
          BD, AirDry, LL15, DUL, SAT source: Unknown source or quality of data
          Rocks, ParticleSizeSand, ParticleSizeSilt, ParticleSizeClay source: Calculated
          SoilCrop wheatSoil: LL=[0.07, 0.2, 0.2, 0.2, 0.21, 0.3, 0.244, 0.28, 0.316]; KL=[0.06, 0.06, 0.06, 0.06, 0.04, 0.04, 0.04, 0.02, 0.02]; XF=[1, 1, 1, 1, 1, 1, 1, 1, 1]
            LL source: Field measured and checked for sensibility
          SoilCrop barleySoil: LL=[0.07, 0.2, 0.2, 0.2, 0.21, 0.3, 0.244, 0.28, 0.316]; KL=[0.07, 0.07, 0.07, 0.07, 0.05, 0.05, 0.05, 0.03, 0.03]; XF=[1, 1, 1, 1, 1, 1, 1, 1, 1]
            LL source: Estimated based on local knowledge
          SoilCrop Sub Clover - LeuraSoil: same as Clover.Paddock.Clay (Dunkeld No632-YP).Physical.wheatSoil
        WaterBalance SoilWater: SummerDate=1-Nov; SummerU=6; SummerCona=3.5; WinterDate=1-Apr; WinterU=2; WinterCona=2; DiffusConst=40; DiffusSlope=16; Salb=0.13; CN2Bare=73; CNRed=20; CNCov=0.8; PSIDul=-100; Thickness=[100, 100, 200, 200, 200, 200, 200, 200, 200]; SWCON=[0.4, 0.4, 0.3, 0.3, 0.3, 0.3, 0.25, 0.25, 0.25]
        Organic: FOMCNRatio=40; CarbonUnits=WalkleyBlack
          Thickness  Carbon  SoilCNRatio  FBiom  FInert  FOM
          100        1.05    12           0.04   0.4     284.162
          100        0.45    12           0.04   0.4     235.579
          200        0.3     12           0.02   0.6     161.911
          200        0.3     12           0.02   0.7     111.28
          200        0.25    12           0.02   0.8     76.4813
          200        0.25    12           0.02   1       52.5648
          200        0.2     12           0.01   1       36.1272
          200        0.1     12           0.01   1       24.8298
          200        0.1     12           0.01   1       17.0653
        Chemical: PHUnits=Water
          Thickness  PH   CEC
          100        8.5  10.7075
          100        8.8  9.3575
          200        8.9  9.02
          200        8.9  9.02
          200        8.9  8.9075
          200        8.9  8.9075
          200        8.9  8.795
          200        8.9  8.57
          200        8.9  8.57
          CEC source: Calculated
          PH source: Estimated based on local knowledge
        Nutrient
        Solute NH4: Thickness=[100, 100, 200, 200, 200, 200, 200, 200, 200]; InitialValuesUnits=ppm; WaterTableConcentration=0; D0=0; DepthConstant=0; MaxDepthSoluteAccessible=0; RunoffEffectivenessAtMovingSolute=0; MaxEffectiveRunoff=0
        Solute NO3: Thickness=[100, 100, 200, 200, 200, 200, 200, 200, 200]; InitialValues=[30, 10, 4, 2, 1.5, 1.5, -, -, -]; InitialValuesUnits=ppm; WaterTableConcentration=0; D0=0; DepthConstant=0; MaxDepthSoluteAccessible=0; RunoffEffectivenessAtMovingSolute=0; MaxEffectiveRunoff=0
        Solute Urea: Thickness=[100, 100, 200, 200, 200, 200, 200, 200, 200]; InitialValues=[0, 0, 0, 0, 0, 0, 0, 0, 0]; InitialValuesUnits=kg/ha; WaterTableConcentration=0; D0=0; DepthConstant=0; MaxDepthSoluteAccessible=0; RunoffEffectivenessAtMovingSolute=0; MaxEffectiveRunoff=0
        Water: Thickness=[100, 100, 200, 200, 200, 200, 200, 200, 200]; InitialValues=[0.25, 0.4, 0.437, 0.4, 0.38, 0.36, 0.422, 0.44, 0.425]; FilledFromTop=false
        SoilTemperature CERESSoilTemperature
      SurfaceOrganicMatter Surface Organic Matter: InitialResidueType=Barley; InitialResidueMass=0; InitialStandingFraction=0; InitialCPR=0; InitialCNR=0
      Irrigation
      Fertiliser
      Report DailyReport: EventNames=[Clock].DoReport
        VariableNames:
          [Clock].Today
          sum([Pasture].Uptake_NH4) as NH4Uptake
          sum([Pasture].Uptake_NO3) as NO3Uptake
          sum([Pasture].SWUptake)
          [Pasture].Growth
          [Pasture].GreenDM
          [Pasture].AvailGreen
          [Pasture].AvailDM
          [Pasture].DryDM
          [Pasture].LitterDM
          [Pasture].WaterDemand
          //[Pasture].WaterDemandSupply
          (sum([Soil].Urea.kgha) + sum([Soil].NH4.kgha) + sum([Soil].NO3.kgha)) as SoilNContent_kgha
          [Pasture].GLF_GAI
          [Pasture].GLF_N
          [Pasture].GLF_Nutr
          [Pasture].GLF_SM
          [Pasture].GLF_Temp
          [Pasture].GLF_VPD
          [Pasture].GLF_WL
          sum([Water].MM) as total_water
          [Pasture].CoverGreen
          [Pasture].CoverTotal
          [Pasture].LAI
          sum([NO3].kgha) as TotalNO3
          sum([NH4].kgha) as TotalNH4
          [Pasture].PotentialEP
          sum([Pasture].SWUptake) as EP
          [Pasture].SWUptake
          [Pasture].SeedDM
          [Pasture].SeedSoftUnripe[1]
          [Pasture].SeedHardUnripe[1]
          [Pasture].SeedHardRipe[1]
          [Pasture].SeedSoftRipe[1]
          [SurfaceOrganicMatter].Wt
          [SurfaceOrganicMatter].N
          [Pasture].RootDM
          [Pasture].RootN
          [Pasture].N_Fixed
          [Pasture].RootProfileN
          [Pasture].RootDMProfile
          [SoilWater].LeachNO3
      Report HarvestReport: EventNames=[Clock].EndOfSimulation
        VariableNames:
          [Clock].Today
          //[Barley].AboveGroundLive.Wt
          //[Barley].Leaf.LAI
      Pasture: Species=Sub Clover - Leura; Fertility=0.8; Nutrients=N; MaxRtDep=550; LaggedDayT=-999.9; Phenology=4; FlowerLen=0; FlowerTime=0; SencIndex=0; DormIndex=0; DormT=-999.9; ExtinctCoeff=[0.65, 0.65, 0.65]; SeedDormTime=0; GermIndex=0; Albedo=0.23; Gsmax=0.011; R50=200; WaterDemand=0; LAI=0
        Seeds={soft_unripe=[0], soft_ripe=[0], hard_unripe=[0], hard_ripe=[0]}
        DryCohortInitialise Dead: Status=dead; LeafDMD=[0.55]; LeafWeight=[1000]; LeafNConc=[0]; LeafSpecificArea=[415]; StemDMD=[0.55]; StemWeight=[1000]; StemNConc=[0]; StemSpecificArea=[100]
        DryCohortInitialise Litter: Status=litter; LeafDMD=[0.55]; LeafWeight=[101]; LeafNConc=[0]; LeafSpecificArea=[415]; StemDMD=[0.5]; StemWeight=[99]; StemNConc=[0]; StemSpecificArea=[100]
        SeedCohortInitialise: SoftUnripe=[75]; HardUnripe=[75]; HardRipe=[250]; SoftRipe=[0]
  Simulation CloverRyegrass (disabled)
    Weather: FileName=AusFarm/Hamilton.txt
    Clock: Start=1990-01-01; End=2000-02-03
    Summary summaryfile
    SoilArbitrator Soil Arbitrator
    MicroClimate: a_interception=0; b_interception=1; c_interception=0; d_interception=0; SoilHeatFluxFraction=0.4; MinimumHeightDiffForNewLayer=0; NightInterceptionFraction=0.5; ReferenceHeight=2
    Zone Paddock: Area=1; Slope=0; AspectAngle=0; Altitude=50
      Manager Sowing: same as Clover.Paddock.Sowing
      Operations IrrigationEvents: same as SoilT.RyegrassBase.Paddock.IrrigationEvents
      Operations FertiliserEvents
        2009-11-23  [Fertiliser].Apply(150, "NO3N",10);
      Soil Clay (Dunkeld No632-YP): SoilType=Clay; Site=Dunkeld; NearestTown=Dunkeld; Region=South West; State=Victoria; Country=Australia; ApsoilNumber=632-YP; Latitude=-37.649; Longitude=142.342; LocationAccuracy=Regional Soil Type; YearOfSampling=0; DataSource=YP. Data provided by Tim Johnston (DPI Vic)
        Comments=Clay - Wheat CLL measured, Barley estimated; OC & pH estimated for all laters;
        Physical
          Thickness  BD     AirDry  LL15  DUL    SAT
          100        0.93   0.035   0.07  0.25   0.619
          100        1.3    0.16    0.2   0.4    0.479
          200        1.281  0.2     0.2   0.437  0.487
          200        1.33   0.2     0.2   0.4    0.468
          200        1.29   0.2     0.2   0.38   0.483
          200        1.39   0.2     0.2   0.36   0.445
          200        1.321  0.2     0.2   0.422  0.472
          200        1.27   0.2     0.2   0.44   0.491
          200        1.313  0.2     0.2   0.425  0.475
          BD, AirDry, LL15, DUL, SAT source: Unknown source or quality of data
          SoilCrop wheatSoil: LL=[0.07, 0.2, 0.2, 0.2, 0.21, 0.3, 0.244, 0.28, 0.316]; KL=[0.06, 0.06, 0.06, 0.06, 0.04, 0.04, 0.04, 0.02, 0.02]; XF=[1, 1, 1, 1, 1, 1, 1, 1, 1]
            LL source: Field measured and checked for sensibility
          SoilCrop barleySoil: LL=[0.07, 0.2, 0.2, 0.2, 0.21, 0.3, 0.244, 0.28, 0.316]; KL=[0.07, 0.07, 0.07, 0.07, 0.05, 0.05, 0.05, 0.03, 0.03]; XF=[1, 1, 1, 1, 1, 1, 1, 1, 1]
            LL source: Estimated based on local knowledge
          SoilCrop Sub Clover - LeuraSoil: same as CloverRyegrass.Paddock.Clay (Dunkeld No632-YP).Physical.wheatSoil
          SoilCrop Perennial RyegrassSoil: LL=[0.07, 0.2, 0.2, 0.2, 0.21, 0.3, 0.244, 0.28, 0.316]; KL=[0.07, 0.07, 0.07, 0.06, 0.04, 0.02, 0.02, 0.02, 0.02]; XF=[1, 1, 1, 1, 1, 1, 1, 1, 1]
        WaterBalance SoilWater: same as Clover.Paddock.Clay (Dunkeld No632-YP).SoilWater
        Organic: same as Clover.Paddock.Clay (Dunkeld No632-YP).Organic
        Chemical: Thickness=[100, 100, 200, 200, 200, 200, 200, 200, 200]; PH=[8.5, 8.8, 8.9, 8.9, 8.9, 8.9, 8.9, 8.9, 8.9]; PHUnits=Water
          PH source: Estimated based on local knowledge
        Nutrient
        Solute NH4: same as Clover.Paddock.Clay (Dunkeld No632-YP).NH4
        Solute NO3: same as Clover.Paddock.Clay (Dunkeld No632-YP).NO3
        Solute Urea: same as Clover.Paddock.Clay (Dunkeld No632-YP).Urea
        Water: Thickness=[100, 100, 200, 200, 200, 200, 200, 200, 200]; InitialValues=[0.25, 0.4, 0.437, 0.4, 0.38, 0.36, 0.422, 0.44, 0.425]; FilledFromTop=false
        SoilTemperature CERESSoilTemperature
      SurfaceOrganicMatter Surface Organic Matter: InitialResidueType=Barley; InitialResidueMass=0; InitialStandingFraction=0; InitialCPR=0; InitialCNR=0
      Irrigation
      Fertiliser
      Report DailyReport: EventNames=[Clock].DoReport
        VariableNames:
          [Clock].Today
          sum([Clover].Uptake_NH4) as NH4Uptake
          sum([Clover].Uptake_NO3) as NO3Uptake
          sum([Clover].SWUptake)
          [Clover].Growth
          [Clover].GreenDM
          [Clover].AvailGreen
          [Clover].AvailDM
          [Clover].DryDM
          [Clover].LitterDM
          [Ryegrass].Growth
          [Ryegrass].GreenDM
          [Ryegrass].AvailGreen
          [Ryegrass].AvailDM
          [Ryegrass].DryDM
          [Ryegrass].LitterDM
          [Clover].WaterDemand
          //[Clover].WaterDemandSupply
          (sum([Soil].Urea.kgha) + sum([Soil].NH4.kgha) + sum([Soil].NO3.kgha)) as SoilNContent_kgha
          [Clover].GLF_GAI
          [Clover].GLF_N
          [Clover].GLF_Nutr
          [Clover].GLF_SM
          [Clover].GLF_Temp
          [Clover].GLF_VPD
          [Clover].GLF_WL
          sum([Water].MM) as total_water
          [Clover].CoverGreen
          [Clover].CoverTotal
          [Clover].LAI
          sum([NO3].kgha) as TotalNO3
          sum([NH4].kgha) as TotalNH4
          [Clover].PotentialEP
          sum([Clover].SWUptake) as EP
          [Clover].SWUptake
          [Clover].SeedDM
          [Clover].SeedSoftUnripe[1]
          [Clover].SeedHardUnripe[1]
          [Clover].SeedHardRipe[1]
          [Clover].SeedSoftRipe[1]
      Report HarvestReport: EventNames=[Clock].EndOfSimulation
        VariableNames:
          [Clock].Today
          //[Barley].AboveGroundLive.Wt
          //[Barley].Leaf.LAI
      Memo
        Fertility scalar makes a big difference! It is normally 0.8 for single species
      Pasture Clover: Species=Sub Clover - Leura; Fertility=0.4; Nutrients=N; MaxRtDep=550; LaggedDayT=-999.9; Phenology=4; FlowerLen=0; FlowerTime=0; SencIndex=0; DormIndex=0; DormT=-999.9; ExtinctCoeff=[0, 0, 0]; SeedDormTime=0; GermIndex=0; Albedo=0.23; Gsmax=0.011; R50=200; WaterDemand=0; LAI=0
        Seeds={soft_unripe=[0], soft_ripe=[0], hard_unripe=[0], hard_ripe=[0]}
        DryCohortInitialise Dead: Status=dead; LeafDMD=[0.55]; LeafWeight=[1000]; LeafNConc=[0]; LeafSpecificArea=[415]; StemDMD=[0.55]; StemWeight=[1000]; StemNConc=[0]; StemSpecificArea=[100]
        DryCohortInitialise Litter: Status=litter; LeafDMD=[0.55]; LeafWeight=[101]; LeafNConc=[0]; LeafSpecificArea=[415]; StemDMD=[0.5]; StemWeight=[99]; StemNConc=[0]; StemSpecificArea=[100]
        SeedCohortInitialise: SoftUnripe=[467]; HardUnripe=[545]; HardRipe=[121]; SoftRipe=[14.58]
      Pasture Ryegrass: Species=Perennial Ryegrass; Fertility=0.4; Nutrients=N; MaxRtDep=650; LaggedDayT=-999.9; Phenology=3.015; FlowerLen=0; FlowerTime=0; SencIndex=0; DormIndex=0; DormT=-999.9; ExtinctCoeff=[0, 0, 0]; SeedDormTime=0; GermIndex=0; Albedo=0.23; Gsmax=0.011; R50=200; WaterDemand=0; LAI=0
        Seeds={soft_unripe=[0], soft_ripe=[0], hard_unripe=[0], hard_ripe=[0]}
        GreenCohortInitialise GreenEst: RootWeight=[0, 400]; RootDepth=650; EstIndex=0; StressIndex=0; StemReloc=0; Frosts=0; Status=established; LeafDMD=[0.82]; LeafWeight=[900]; LeafNConc=[0.01]; LeafSpecificArea=[430]; StemDMD=[0.73]; StemWeight=[1096]; StemNConc=[0.01]; StemSpecificArea=[10]
        GreenCohortInitialise GreenSen: RootWeight=[200, 0]; RootDepth=650; EstIndex=0; StressIndex=0; StemReloc=0; Frosts=0; Status=senescing; LeafDMD=[0.825]; LeafWeight=[397]; LeafNConc=[0.006]; LeafSpecificArea=[10]; StemDMD=[0.825]; StemWeight=[2000]; StemNConc=[0.006]; StemSpecificArea=[10]
        DryCohortInitialise Dead: Status=dead; LeafDMD=[0.6]; LeafWeight=[52]; LeafNConc=[0.006]; LeafSpecificArea=[430]; StemDMD=[0.35]; StemWeight=[500]; StemNConc=[0.006]; StemSpecificArea=[80]
        DryCohortInitialise Litter: Status=litter; LeafDMD=[0.65]; LeafWeight=[2]; LeafNConc=[0.001]; LeafSpecificArea=[10]; StemDMD=[0.35]; StemWeight=[130]; StemNConc=[0.001]; StemSpecificArea=[10]
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