Simulations: Version=168
  DataStore
  Simulation Base
    Weather: FileName=cbr_70014.met
    Clock: Start=1990-08-01; End=1991-02-01
    Summary summaryfile
    SoilArbitrator Soil Arbitrator
    MicroClimate: a_interception=0; b_interception=1; c_interception=0; d_interception=0; SoilHeatFluxFraction=0.4; MinimumHeightDiffForNewLayer=0; NightInterceptionFraction=0.5; ReferenceHeight=2
    Zone Paddock: Area=1; Slope=0; AspectAngle=0; Altitude=50
      Manager Sowing (disabled)
        InitialRootDepth = 10
        Cultivar = Booma
        SowingDate = 10/01/2009 00:00:00
```csharp
using Models.Soils;
using System;
using System.Linq;
using Models.Core;
using System.Collections.Generic;
using System.Text;
using Models.PMF;
using Models;
using System.Xml.Serialization;
using APSIM.Shared.Utilities;
using System.Data;
using Models.PMF.Interfaces;
using Models.Surface;

namespace Models
{
    [Serializable] 
    //[System.Xml.Serialization.XmlInclude(typeof(Model))]
    public class Script : Model
    {
        [Link] Plant Barley;
        [Link] Clock Clock;
        [Link] Zone zone;
        [Link] Simulation Simulation;
        [Link] SurfaceOrganicMatter SurfOM;
        
                
        [Description("Initial Root Depth")]
        public double InitialRootDepth { get; set; }
        [Description("Cultivar name")]
        public string Cultivar { get; set; }
        [Description("Sowing Date")]
        public DateTime SowingDate { get; set; }
        
        
        [EventSubscribe("DoManagement")]
        private void OnDoManagement(object sender, EventArgs e)
        {
            if (Clock.Today.Date == SowingDate)
            {
                Barley.Sow(cultivar: Cultivar, population: 280, depth: InitialRootDepth, rowSpacing: 150);
                
            }
        }
    }
}
```
      Operations IrrigationEvents
        2009-11-11  [Irrigation].Apply(20);
        2009-11-19  [Irrigation].Apply(25);
        2009-11-26  [Irrigation].Apply(25);
        2009-12-11  [Irrigation].Apply(20);
        2009-12-21  [Irrigation].Apply(35);
        2009-12-29  [Irrigation].Apply(40);
        2010-01-05  [Irrigation].Apply(35);
        2010-01-13  [Irrigation].Apply(30);
        2010-03-02  [Irrigation].Apply(40);
        2010-03-03  [Irrigation].Apply(40);
      Operations FertiliserEvents
        2009-11-23  [Fertiliser].Apply(150, Fertiliser.Types.NO3N,10);
      Operations Harvest
        2010-02-23  [Barley].Harvest();
      Soil: SoilType=NZ_sedementary; Region=Plains; State=Canterbury; Country=New Zealnd; Latitude=0; Longitude=0
        Chemical: Thickness=[150, 150, 300, 300, 300, 300]; PH=[6.6, 6.2, 5.7, 5.5, 5.5, 5.5]; PHUnits=Water
        Physical
          Thickness  BD   AirDry  LL15  DUL   SAT   KS
          200        1.1  0.05    0.07  0.33  0.48  4832.039
          200        1.1  0.1     0.1   0.28  0.48  389.229
          200        1.3  0.08    0.08  0.26  0.4   97
          200        1.2  0.1     0.1   0.27  0.38  97.995
          200        1.2  0.12    0.12  0.28  0.37  97.995
          200        1.2  0.12    0.12  0.28  0.36  97.995
          200        1.2  0.12    0.12  0.26  0.36  98
          200        1.2  0.12    0.12  0.25  0.36  98
          400        1.2  0.12    0.12  0.25  0.36  98
          SoilCrop BarleySoil: LL=[0.07, 0.1, 0.08, 0.1, 0.12, 0.12, 0.12, 0.12, 0.12]; KL=[0.1, 0.07, 0.06, 0.05, 0.04, 0.03, 0.03, 0.03, 0.02]; XF=[1, 1, 1, 1, 1, 1, 1, 1, 1]
          SoilCrop Perennial RyegrassSoil: LL=[0.15, 0.14, 0.08, 0.12, 0.12, 0.12, 0.12, 0.12, 0.12]; KL=[0.1, 0.1, 0.08, 0.04, 0.01, 0, 0, 0, 0]; XF=[1, 1, 1, 1, 1, 0, 0, 0, 0]
        WaterBalance SoilWater: SummerDate=1-Nov; SummerU=6; SummerCona=2; WinterDate=1-Apr; WinterU=9; WinterCona=4.4; DiffusConst=0; DiffusSlope=0; Salb=0.18; CN2Bare=68; CNRed=20; CNCov=0.8; DischargeWidth=0; CatchmentArea=0; PSIDul=-100
          Thickness  SWCON  KLAT
          150        0.9    0
          150        0.9    0
          300        0.9    0
          300        0.9    0
          300        0.9    0
          300        0.9    0
        Organic: FOMCNRatio=20; CarbonUnits=Total
          Thickness  Carbon  SoilCNRatio  FBiom  FInert  FOM
          150        2.7     11           0.025  0.45    390.598
          150        2.5     11           0.025  0.6     289.362
          300        1.45    11           0.015  0.75    158.805
          300        0.32    11           0.01   0.9     87.154
          300        0.24    11           0.01   0.96    47.831
          300        0.24    11           0.01   0.96    26.25
        CERESSoilTemperature Temperature
        Water: Thickness=[200, 200, 200, 200, 200, 200, 200, 200, 400]; InitialValues=[0.31, 0.28, 0.26, 0.27, 0.28, 0.28, 0.26, 0.25, 0.25]; InitialPAWmm=324; RelativeTo=LL15; FilledFromTop=false
        Nutrient
          DirectedGraphInfo={Nodes=[{Name=Inert, OutlineColour=Black}, {Name=FOMLignin, OutlineColour=Black}, {Name=FOMCellulose, OutlineColour=Black}, {Name=FOMCarbohydrate, OutlineColour=Black}, {Name=Microbial, OutlineColour=Black}, {Name=Humic, OutlineColour=Black}, {Name=Urea, OutlineColour=Black}, {Name=NO3, OutlineColour=Black}, {Name=NH4, OutlineColour=Black}, {Name=Atmosphere, OutlineColour=Black}, {Name=SurfaceResidue, OutlineColour=Black}], Arcs=[{SourceName=FOMLignin, DestinationName=Microbial}, {SourceName=FOMLignin, DestinationName=Humic}, {SourceName=FOMCellulose, DestinationName=Microbial}, {SourceName=FOMCellulose, DestinationName=Humic}, {SourceName=FOMCarbohydrate, DestinationName=Microbial}, {SourceName=FOMCarbohydrate, DestinationName=Humic}, {SourceName=Microbial, DestinationName=Microbial}, {SourceName=Microbial, DestinationName=Humic}, {SourceName=Humic, DestinationName=Microbial}, {SourceName=Urea, DestinationName=NH4}, {SourceName=NO3, DestinationName=Atmosphere}, {SourceName=NH4, DestinationName=NO3}, {SourceName=SurfaceResidue, DestinationName=Microbial}, {SourceName=SurfaceResidue, DestinationName=Humic}]}
        Solute Urea: Thickness=[150, 150, 300, 300, 300, 300]; InitialValues=[0, 0, 0, 0, 0, 0]; InitialValuesUnits=ppm; WaterTableConcentration=0; D0=0; DepthConstant=0; MaxDepthSoluteAccessible=0; RunoffEffectivenessAtMovingSolute=0; MaxEffectiveRunoff=0
        Solute NH4: Thickness=[150, 150, 300, 300, 300, 300]; InitialValues=[1.8, 1.9, 1.5, 1.3, 1.3, 0.9]; InitialValuesUnits=ppm; WaterTableConcentration=0; D0=0; DepthConstant=0; MaxDepthSoluteAccessible=0; RunoffEffectivenessAtMovingSolute=0; MaxEffectiveRunoff=0
        Solute NO3: Thickness=[150, 150, 300, 300, 300, 300]; InitialValues=[14.6, 17.8, 6.8, 7.6, 10.2, 11.2]; InitialValuesUnits=ppm; WaterTableConcentration=0; D0=0; DepthConstant=0; MaxDepthSoluteAccessible=0; RunoffEffectivenessAtMovingSolute=0; MaxEffectiveRunoff=0
      Plant Barley: PlantType=Barley
      SurfaceOrganicMatter Surface Organic Matter: InitialResidueName=Barley_stubble; InitialResidueType=Barley; InitialResidueMass=1500; InitialStandingFraction=0; InitialCPR=0; InitialCNR=80; FractionFaecesAdded=1
      Irrigation
      Fertiliser
        Definitions:
          Name         Description                            FractionNO3  FractionNH4  FractionUrea  FractionRockP  FractionBandedP  FractionLabileP  FractionCa
          CalciteCA    Ca as finely ground Agricultural Lime  0            0            0             0              0                0                1
          CalciteFine  finely ground Agricultural Lime        0            0            0             0              0                0                0.4
          Dolomite     finely ground dolomite                 0            0            0             0              0                0                0.22
          NO3N         N as nitrate                           1            0            0             0              0                0                0
          NH4N         N as ammonium                          0            1            0             0              0                0                0
          NH4NO3N      ammonium nitrate                       0.5          0.5          0             0              0                0                0
          DAP          di-ammonium phosphate                  0            0.18         0             0              0                0                0
          MAP          mono-ammonium phosphate                0            0.11         0             0              0                0                0
          UAN_N        N as Urea-AmmoniumNitrate              0.25         0.25         0.5           0              0                0                0
          UreaN        N as urea                              0            0            1             0              0                0                0
          UreaNO3      N as urea                              0.5          0            0.5           0              0                0                0
          Urea         Urea fertiliser                        0            0            0.46          0              0                0                0
          NH4SO4N      ammonium sulphate                      0            1            0             0              0                0                0
          RockP        Rock phosphorus                        0            0            0             0.8            0                0.2              0
          BandedP      Banded phosphorus                      0            0            0             0              1                0                0
          BroadcastP   Broadcast phosphorus                   0            0            0             0              0                1                0
      Report DailyReport: EventNames=[Clock].DoReport
        VariableNames:
          [Clock].Today
          sum([Pasture].Uptake_NH4) as NH4Uptake
          sum([Pasture].Uptake_NO3) as NO3Uptake
          sum([Pasture].SWUptake)
          [Pasture].Growth
          [Pasture].GreenDM
          [Pasture].AvailGreen
          [Pasture].AvailDM
          [Pasture].DryDM
          [Pasture].LitterDM
          [Pasture].WaterDemand
          [Pasture].WaterDemandSupply
          (sum([Soil].Urea.kgha) + sum([Soil].NH4.kgha) + sum([Soil].NO3.kgha)) as SoilNContent_kgha
      Report HarvestReport: EventNames=[Clock].EndOfSimulation
        VariableNames:
          [Clock].Today
          //[Barley].AboveGroundLive.Wt
          //[Barley].Leaf.LAI
      Pasture: Species=Perennial Ryegrass; Nutrients=N; MaxRtDep=650; LaggedDayT=-999.9; Phenology=1.0015; FlowerLen=0; FlowerTime=0; SencIndex=0; DormIndex=0; DormT=-999.9; ExtinctCoeff=[0, 0, 0.55]; SeedDormTime=0; GermIndex=0; Albedo=0.23; Gsmax=0.011; R50=200; WaterDemand=0; LAI=0
        GreenCohortInitialise: RootWeight=[400, 400]; RootDepth=650; Status=established; LeafDMD=[0.825]; LeafWeight=[800]; LeafNConc=[0.01]; LeafSpecificArea=[430]; StemDMD=[0.825]; StemWeight=[800]; StemNConc=[0.01]; StemSpecificArea=[10]
        DryCohortInitialise: Status=established; LeafDMD=[0.6]; LeafWeight=[500]; LeafNConc=[0]; LeafSpecificArea=[430]; StemDMD=[0.35]; StemWeight=[1500]; StemNConc=[0]; StemSpecificArea=[80]
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