Simulations: Version=121
  Memo TitlePage
    # The APSIM Pinus Model
  Memo Introduction
    # Pinus Model Notes

    ## Plant Modelling Framework

    The APSIM Pinus model has been developed using the Plant Modelling Framework (PMF) of [brown_plant_2014] within  APSIM Next Generation [holzworth_apsim_2014]. This new framework provides a library of plant organ and process submodels that can be coupled, at runtime, to construct a model in much the same way that models can be coupled to construct a simulation. This means that dynamic composition of lower level processes and organ classes (e.g. photosynthesis, leaf) into larger constructions (e.g. maize, wheat, Pinus) can be achieved by the model developer without additional coding.

    ##Pecularities of Pinus and This Model

    The Pinus model consists of:

    * a phenology model to simulate development through sequential growth phases
    * a collection of organs to simulate the various plant parts
    * an arbitrator to allocate resources (N, biomass) to the various plant organs

    This work builds upon earlier APSIM forest models such as described by [Huthetal2002],[zerger_integrating_2001] and [huth_managing_2008].

    Pinus is a reasonably straight forward perennial crop to model. This model has been set up for simulation of even-aged plantations (transplanted seedlings) or native forests (also assumed to start the simulation as a transplanted seedling, but in practice it would be sown from naturally distributed seed). Plants grow in accordance with available resources and conditions, which in this version of the model are temperature, radiation, available soil water, and available soil nitrogen. Leaf, branch and roots senesce, remain attached for some time, then detach to produce litter. Above-ground biomass is the main target of production, which is made up of organs that develop from default partitioniing targets that is modified daily due to organ demand. Forest managers also deal with tree size, which are set in the model as a function of aboveground biomass. During model development, we found that Pinus model performance (plant or stand development) was particularly sensitive to leaf lifespan/longevity, specific leaf area, dead leaf detachment, partitioning to roots and shoots, mortality and thinning, and weeds (if present).

    There are many Pinus genotypes (species, closely related genera, provenances, families, clones, and hybrids) that can behave differently in response to their growing environment. This build of the Pinus model was calbirated on datasets of three species (E. globulus, E. saligna, E. grandis), one hybrid (E. grandis x E. urophylla), and two clones of this hybrid.

    ##Including a Pinus crop in an APSIM simulation

    There is a Pinus example simulation available by clicking the "Open an Example" icon available on the second tab displayed when APSIM Next Gen is opened.  This provides a useful demonstration of how to simulate a Pinus crop and provides some useful graphs for viewing model behaviour and performance.

    To incluce a Pinus crop in a simulation the "Pinus" model needs to be added to the paddock, field or zone in which it is to be grown.  This can be done by (a) right clicking on the "Paddock", selecting "Add" from the drop down menu and then selecting "Pinus" from the list that comes up, or (b) dragging or copying and pasting the model up from the standard toolbox.  A TreeSowingRule needs to be set up to start the crop off. So far, no harvesting or replanting is included in this simulation, but that option will be needed in the future, e.g. for simulation of multiple rotations.

    This document elsewhere provides a more detailed description of the model, describes the validation and test datasets, and model performance.
  Replacements
    Report: EventNames=[Clock].DoReport
      VariableNames:
        [Clock].Today
        //[TreeManagement].Script.CultivarName. as Cultivar
        [Pinus].Age
        [Pinus].Population*10000 as stemsperha
        [Pinus].AboveGround.Wt
        [Pinus].AboveGround.N
        [Pinus].BelowGround.Wt
        [Pinus].Leaf.Dead.Wt
        [Pinus].Leaf.Live.Wt
        [Pinus].Leaf.Wt
        [Pinus].Branch.Live.Wt
        [Pinus].Branch.Dead.Wt
        [Pinus].Branch.Wt
        [Pinus].Leaf.Detached.Wt
        [Pinus].Stem.Live.Wt
        [Pinus].Total.N
        [Pinus].Leaf.Live.N
        [Pinus].Leaf.CoverGreen
        [Pinus].Leaf.LAI
        [Pinus].Leaf.Fn
        [Pinus].Leaf.Fw
        [Pinus].TotalLive.Wt
        [Pinus].IndividualTreeStemWt
        [Pinus].Stem.DBH
        [Pinus].Stem.Ht
        [Pinus].RootShootRatio
        [Pinus].Stem.Vol
        [Pinus].Stem.MAI
        [Pinus].Stem.BA
        [Pinus].Stem.BarkThickness
        [Pinus].Stem.BarkWt
        [Pinus].Stem.BAub
        [Pinus].Stem.DBHub
        [Pinus].Stem.MAIub
        [Pinus].Stem.VolBark
        [Pinus].Stem.Volub
        [Pinus].Stem.WoodDensity
        [Pinus].Stem.BarkDensity
        [Pinus].Stem.WoodWt
        [Pinus].Stem.Wt
        [Pinus].Stem.Live.Wt
        [Pinus].FineRoot.Wt
        [Pinus].CoarseRoot.Wt
        [Pinus].Fruit.Wt
        [Pinus].TotalWoodBark.Wt
        //(([Soil].SoilWater.SW[2])+([Soil].SoilWater.SW[3]))/2 as SW30
        //(([Soil].SoilWater.SW[9])+([Soil].SoilWater.SW[10]))/2 as SW600
        [Soil].SoilWater.SW[1] as SWD3
        [Soil].SoilWater.SW[2] as SWD3
        //[Soil].SoilWater.SW[3] as SWD3
        //[Soil].SoilWater.SW[4] as SWD4
        //[Soil].SoilWater.SW[5] as SWD5
        //[Soil].SoilWater.SW[6] as SWD6
        //[Soil].SoilWater.SW[7] as SWD7
        //[Soil].SoilWater.SW[8] as SWD8
        sum([Soil].SoilWater.SWmm) as SWTotal
        //[SoilNitrogen].NO3ppm
        //[SoilNitrogen].NH4ppm
        //[SoilNitrogen].NO3.kgha
        //[Nutrient].NH4.kgha[1]
        //[Nutrient].NO3.kgha[1]
        Sum ([Nutrient].NO3.kgha)+([Nutrient].NH4.kgha) as MineralNkgpha
        //([SoilNitrogen].NO3.kgha[1]*1000000/14)/([Soil].SoilWater.SW[1]*1000000) as NO3mMD1
        //([SoilNitrogen].NO3.kgha[2]*1000000/14)/([Soil].SoilWater.SW[2]*1000000) as NO3mMD2
        //([SoilNitrogen].NO3.kgha[3]*1000000/14)/([Soil].SoilWater.SW[3]*1000000) as NO3mMD3
        //([SoilNitrogen].NH4.kgha[1]*1000000/14)/([Soil].SoilWater.SW[1]*1000000) as NH4mMD1
        //([SoilNitrogen].NH4.kgha[2]*1000000/14)/([Soil].SoilWater.SW[2]*1000000) as NH4mMD2
        //([SoilNitrogen].NH4.kgha[3]*1000000/14)/([Soil].SoilWater.SW[3]*1000000) as NH4mMD3
    Report ReportSoilWater (disabled): EventNames=[Clock].DoReport
      VariableNames:
        [Clock].Today
        (([Soil].SoilWater.SW[2])+([Soil].SoilWater.SW[3]))/2 as SW30
        (([Soil].SoilWater.SW[9])+([Soil].SoilWater.SW[10]))/2 as SW600
        [Soil].SoilWater.SW[1] as SWD1
        [Soil].SoilWater.SW[2] as SWD2
        [Soil].SoilWater.SW[3] as SWD3
        //[Soil].SoilWater.SW[4] as SWD4
        //[Soil].SoilWater.SW[5] as SWD5
        //[Soil].SoilWater.SW[6] as SWD6
        //[Soil].SoilWater.SW[7] as SWD7
        //[Soil].SoilWater.SW[8] as SWD8
        sum([Soil].SoilWater.SWmm) as SWTotal
    Report SensibilityReport: EventNames=[Clock].EndOfWeek
      VariableNames:
        [Clock].Today
        [Pinus].Leaf.CoverGreen
        [Pinus].Age
        [Pinus].Stem.DBH
        [Pinus].Stem.Ht
        [Pinus].Stem.Vol
        [Pinus].Stem.MAI
    Report HarvestReport: EventNames=[Pinus].Harvesting
      VariableNames:
        [Clock].Today
        [Pinus].Stem.DBH
        [Pinus].Stem.Ht
        [Pinus].RootShootRatio
        [Pinus].Stem.Vol
        [Pinus].Stem.MAI
        [Pinus].Stem.BA
        [Pinus].Stem.BarkThickness
        [Pinus].Stem.BarkWt
        [Pinus].Stem.BAub
        [Pinus].Stem.DBHub
        [Pinus].Stem.MAIub
        [Pinus].Stem.VolBark
        [Pinus].Stem.Volub
        [Pinus].Stem.WoodDensity
    Report SCRUMReport (disabled): EventNames=[Clock].DoReport
      VariableNames:
        [Clock].Today
        [SCRUM].Stover.LAI
        [SCRUM].Stover.Wt
    Plant Pinus: PlantType=Pinus; IsAlive=false; IsEnding=false; DaysAfterEnding=0
      Memo
        Root:shoot ratio, and allometric relationships for height (Ht, m), stem diameter (DBH, cm, over bark at 1.3 m height), and their derivatives (stem volume Vol, and mean annual increment MAI) were developed as a function of above-ground biomass from [almeida2003application], [almeida2004parameterisation], [borges2009parametrizaccao], [cromer1993response], and [norgueira2005estadonutricional]. Similarly, above-ground biomass as a function of stem weight or wood weight was developed from the same datasets plus [turner1986organic], [byrne1989above], [bradstock1981biomass], [polglase1995mineralization], [snow1999nitrogen], [snow1999modelling], [myers1996growth], [myers1998response], and [melo2015responses].
      AccumulateFunction Age: StartStageName=Emergence; EndStageName=Old; FractionRemovedOnCut=0; FractionRemovedOnHarvest=0; FractionRemovedOnGraze=0; FractionRemovedOnPrune=0
        Constant day: FixedValue=0.00273973; Units=years
          Memo
            This converts days of growth to age in years.
      Constant MortalityRate: FixedValue=0
      Phenology
        StageBasedInterpolation StageCode: Stages=[Emergence, EndJuvenile, Maturity, Old]; Codes=[1, 2, 3, 4]; Proportional=true
        Constant ThermalTime: FixedValue=1; Units=^od
        GerminatingPhase Germinating: Start=Sowing; End=Germination
          Memo
            We make no distinction between sowing and transplanting in this model, but all sites used transplants not sown seeds. Initial weights are specified for leaf (1 g/plant) and fine root (0.2 g/plant), which implies these are transplants. Germinating and emerging phenology phases are included in case they are needed by later users. No planting shock is included, but this could be considered in future versions, e.g. delay in commencement of root downward growth.
        EmergingPhase Emerging: ShootLag=1; ShootRate=0; Start=Germination; End=Emergence; TTForTimeStep=0
          VariableReference ThermalTime: VariableName=[Phenology].ThermalTime
        GenericPhase Juvenile: Start=Emergence; End=EndJuvenile
          Constant Progression: FixedValue=1; Units=^od
          Constant Target: FixedValue=365; Units=^o
        GenericPhase Mature: Start=EndJuvenile; End=Maturity
          Constant Progression: FixedValue=1; Units=^od
          Constant Target: FixedValue=1825; Units=^o
        GenericPhase Declining: Start=Maturity; End=Old
          Constant Progression: FixedValue=1; Units=^od
          Constant Target: FixedValue=27010; Units=^o
        EndPhase Old: Start=Old; End=Unused
          Constant ThermalTime: FixedValue=1; Units=^od
      OrganArbitrator Arbitrator
        BiomassTypeArbitrator DMArbitration
          Folder PotentialPartitioningMethods
            ReallocationMethod
            AllocateFixationMethod
            RetranslocationMethod
            SendPotentialDMAllocationsMethod
          Folder AllocationMethods
            NutrientConstrainedAllocationMethod
            DryMatterAllocationsMethod
          RelativeAllocation ArbitrationMethod
        BiomassTypeArbitrator NArbitration
          Folder PotentialPartitioningMethods
            ReallocationMethod
          Folder ActualPartitioningMethods
            AllocateFixationMethod
            RetranslocationMethod
          Folder AllocationMethods
            NitrogenAllocationsMethod
          RelativeAllocation ArbitrationMethod
          AllocateUptakesMethod
        WaterUptakeMethod
        NitrogenUptakeMethod
      CompositeBiomass AboveGround: DMDOfStructural=0.6
        Propertys=[[Branch].Live, [Branch].Dead, [Leaf].Live, [Leaf].Dead, [Stem].Live, [Stem].Dead, [Fruit].Live, [Fruit].Dead]
      CompositeBiomass BelowGround: DMDOfStructural=0.6
        Propertys=[[FineRoot].Live, [FineRoot].Dead, [CoarseRoot].Live, [CoarseRoot].Dead]
      CompositeBiomass TotalWoodBark: Propertys=[[Stem].Live, [Stem].Dead, [Branch].Live, [Branch].Dead]; DMDOfStructural=0.6
      CompositeBiomass Total: DMDOfStructural=0.6
        Propertys=[[Leaf].Live, [Leaf].Dead, [Stem].Live, [Stem].Dead, [Branch].Live, [Branch].Dead, [FineRoot].Live, [FineRoot].Dead, [CoarseRoot].Live, [CoarseRoot].Dead]
        Memo
          Note that this  property does not include branches.
      CompositeBiomass TotalLive: DMDOfStructural=0.6
        Propertys=[[Leaf].Live, [Branch].Live, [Stem].Live, [FineRoot].Live, [CoarseRoot].Live, [Fruit].Live]
        Memo
          Note that this  property does not include branches, and it is used to calculate IndividualTreeLiveWt.
      CompositeBiomass TotalDead: DMDOfStructural=0.6
        Propertys=[[Leaf].Dead, [Branch].Dead, [Stem].Dead, [FineRoot].Dead, [CoarseRoot].Dead, [Fruit].Dead]
        Memo
          Note that this  property does not include branches.
      DivideFunction IndividualTreeLiveWt
        VariableReference ABGWt: VariableName=[Pinus].Aboveground.Wt
        VariableReference Population: VariableName=[Pinus].Population
        Memo
          Note that this  property does not include branches. It is used in calculating DM Demands of several plant components.
      DivideFunction IndividualTreeStemWt
        VariableReference StemWt: VariableName=[Pinus].Stem.Wt
        VariableReference Population: VariableName=[Pinus].Population
      GenericOrgan Fruit: IsAboveGround=true
        Memo
          For many of the parameters in this organ, see comments for similar parameters in the leaf organ.
        Constant NReallocationFactor: FixedValue=0; Units=/d
        Constant NRetranslocationFactor: FixedValue=0.05; Units=/d
        PhaseLookupValue NitrogenDemandSwitch: Start=Emergence; End=Old
          Constant: FixedValue=1
        Constant DMRetranslocationFactor: FixedValue=0; Units=/d
        Constant SenescenceRate: FixedValue=0; Units=/d
        Constant MaximumNConc: FixedValue=0.01; Units=g/g
        Constant MinimumNConc: FixedValue=0.0014; Units=g/g
        Constant DetachmentRateFunction: FixedValue=0.05; Units=/d
        Constant MaintenanceRespirationFunction: FixedValue=0; Units=0-1
        Constant DMConversionEfficiency: FixedValue=1; Units=0-1
        RetranslocateNonStructural RetranslocateNitrogen
        BiomassRemoval BiomassRemovalDefaults
          OrganBiomassRemovalType Harvest: FractionLiveToRemove=0; FractionDeadToRemove=0; FractionLiveToResidue=1; FractionDeadToResidue=1
          OrganBiomassRemovalType Cut: FractionLiveToRemove=1; FractionDeadToRemove=0; FractionLiveToResidue=0; FractionDeadToResidue=0
          OrganBiomassRemovalType Prune: FractionLiveToRemove=0; FractionDeadToRemove=0; FractionLiveToResidue=0.6; FractionDeadToResidue=0
          OrganBiomassRemovalType Thin: FractionLiveToRemove=0; FractionDeadToRemove=0; FractionLiveToResidue=0.05; FractionDeadToResidue=0
        Constant DMReallocationFactor: FixedValue=0; Units=/d
        VariableReference CriticalNConc: VariableName=[Fruit].MinimumNConc
        Constant RemobilisationCost: FixedValue=0
        Constant CarbonConcentration: FixedValue=0.45; Units=g/g
        BiomassDemand DMDemands
          Memo
            DM or N demands here are set in a similar way to those described above for the leaf organ.
          MultiplyFunction Structural
            PartitionFractionDemandFunction DMDemandFunction
              LinearInterpolationFunction PartitionFraction
                XYPairs: X=[0, 1000, 10000, 20000, 50000]; Y=[0, 0.002, 0.003, 0.001, 0.0005]
                VariableReference XValue: VariableName=[Pinus].IndividualTreeLiveWt
            Constant StructuralFraction: FixedValue=0.99; Units=0-1
          Constant Metabolic: FixedValue=0
          StorageDMDemandFunction Storage
            SubtractFunction StorageFraction
              Constant One: FixedValue=1
              VariableReference StructuralFraction: VariableName=[Fruit].DMDemands.Structural.StructuralFraction
        BiomassDemand NDemands
          Memo
            DM or N demands here are set in a similar way to those described above for the leaf organ.
          MultiplyFunction Structural
            VariableReference MinNconc: VariableName=[Fruit].minimumNconc
            VariableReference PotentialDMAllocation: VariableName=[Fruit].potentialDMAllocation.Structural
          MultiplyFunction Metabolic
            SubtractFunction MetabolicNconc
              VariableReference CritNconc: VariableName=[Fruit].criticalNConc
              VariableReference MinNconc: VariableName=[Fruit].minimumNconc
            VariableReference PotentialDMAllocation: VariableName=[Fruit].potentialDMAllocation.Structural
          StorageNDemandFunction Storage
            VariableReference NitrogenDemandSwitch: VariableName=[Fruit].nitrogenDemandSwitch
            VariableReference MaxNconc: VariableName=[Fruit].maximumNconc
        BiomassDemand InitialWt
          Constant Structural: FixedValue=0; Units=g
          Constant Metabolic: FixedValue=0
          Constant Storage: FixedValue=0
      PerennialLeaf Leaf: MaintenanceRespiration=0; GrowthRespiration=0; Albedo=0.15; Gsmax350=0.005; R50=200; LAI=0; Height=0; FRGR=0; PotentialEP=0; WaterDemand=0
        ExpressionFunction CO2internal: Expression=(163 - [IWeather].MeanT)/(5 - 0.1*[IWeather].MeanT)
        DivideFunction StomatalConductanceCO2Modifier
          VariableReference FCO2: VariableName=[Leaf].Photosynthesis.FCO2
          ExpressionFunction RelativeCO2Gradient
            Expression=([IWeather].CO2 - [Leaf].CO2internal)/(350 - [Leaf].CO2internal)
        MultiplyFunction InitialWtFunction
          Constant InitialPlantWt: FixedValue=1; Units=g/plant
            Memo
              This value is nominally low to reflect the dry weight of leaves on a transplanted seedling.
          VariableReference Population: VariableName=[Plant].Population
        Constant LaiDeadFunction: FixedValue=0; Units=m^2/m^2
        MinimumFunction FRGRFunction
          HourlyInterpolation FRGRFunctionTemp: agregationMethod=0
            XYPairs Response: X=[5, 20, 25, 35]; Y=[0, 0, 0, 0]
              Memo
                This is an assumed temperature response function.
            ThreeHourSin InterpolationMethod
        ExpressionFunction ExtinctionCoefficient
          Expression=([ExtinctionCoefficient].KMatureTrees+([ExtinctionCoefficient].KYoungTrees-[ExtinctionCoefficient].KMatureTrees)*Exp((0-2)*([Pinus].Leaf.LAI/[ExtinctionCoefficient].LAIIntermediateK)^[ExtinctionCoefficient].ShapeCurve))
          Constant KYoungTrees: FixedValue=0.5
          Constant KMatureTrees: FixedValue=0.5
          Constant LAIIntermediateK: FixedValue=0.7
          Constant ShapeCurve: FixedValue=2
          Memo
            A value of 0.50 is commonly used for Pinus ([macfarlane2007estimation]).
        Constant ExtinctionCoefficientDead: FixedValue=0.5
        Constant MaximumNConc: FixedValue=0.022; Units=g/g
          Memo
            Foliar N concentrations are based on [leuning1991spatial].
        Constant MinimumNConc: FixedValue=0.007; Units=g/g
          Memo
            This is an assumed value.
        Constant NReallocationFactor: FixedValue=0.5; Units=/d
          Memo
            A value of zero assumes there is no N reallocation.
        WeightedTemperatureFunction SenescenceRate: MaximumTemperatureWeighting=0
          XYPairs: X=[-5, -2, 0, 2, 2.1]; Y=[0, 0, 0, 0, 0]
        BiomassRemoval BiomassRemovalDefaults
          OrganBiomassRemovalType Harvest: FractionLiveToRemove=0; FractionDeadToRemove=0; FractionLiveToResidue=0.99; FractionDeadToResidue=0.99
          OrganBiomassRemovalType Cut: FractionLiveToRemove=0.8; FractionDeadToRemove=0; FractionLiveToResidue=0; FractionDeadToResidue=0
          OrganBiomassRemovalType Prune: FractionLiveToRemove=0; FractionDeadToRemove=0; FractionLiveToResidue=0.6; FractionDeadToResidue=0
          Memo
            Values in this table reflect the live and dead fractions that are either removed from the system or transferred to the residue pool. Harvest, Cut and Prune methods will affect these values, but default values assume for Harvest assume delimbing at the stump.
        Constant DMConversionEfficiency: FixedValue=1; Units=g/g
        Constant LeafDetachmentTime: FixedValue=14; Units=d
          Memo
            A value here is the number of days between senseence and detachment. A value of 14 days is assumed.
        Constant DetachmentRateFunction: FixedValue=0; Units=/d
          Memo
            A value for DetachmentRateFunction is required in Leaf, Branch, Stem and CoarseRoot components of the model, but a zero value means that immediate detachment has been triggered. A non-zero option might be useful in the future for defining some genotypes.

            The same explanation applies to zero values below for retranslocation factors.
        Constant DMRetranslocationFactor: FixedValue=0; Units=/d
        Constant NRetranslocationFactor: FixedValue=0.05; Units=/d
        RUEModel Photosynthesis
          Constant RUE: FixedValue=1.3; Units=g/MJ
            Memo
              Aboveground RUE for Gliricidia was measured as 1.06 g/MJ by [harrington1995radiation]. Adding c. 0.3 for belowground allocation provides a value of 1.4 g/MJ.
          MinimumFunction FT
            WeightedTemperatureFunction FTDaytime: MaximumTemperatureWeighting=0.75
              XYPairs: X=[2, 13, 14, 32]; Y=[0, 1, 1, 0]
            WeightedTemperatureFunction FTFrost: MaximumTemperatureWeighting=0
              XYPairs: X=[-5, -2, -1, 0, 1, 2, 3, 4, 7]; Y=[0, 0, 0, 0, 0, 0, 0.5, 0.8, 1]
          LinearInterpolationFunction FVPD
            XYPairs: X=[0, 10, 50]; Y=[1, 1, 0]
            VariableReference XValue: VariableName=[Leaf].Photosynthesis.VPD
          LinearInterpolationFunction FN
            XYPairs: X=[0, 1, 1.5]; Y=[0, 1, 1]
            VariableReference XValue: VariableName=[Leaf].Fn
          LinearInterpolationFunction FW
            XYPairs: X=[0, 1, 1.5]; Y=[0, 1, 1]
            VariableReference XValue: VariableName=[Leaf].Fw
          RUECO2Function FCO2: PhotosyntheticPathway=C3
          VariableReference RadnInt: VariableName=[Leaf].RadIntTot
        Constant LeafKillFraction: FixedValue=0; Units=0-1
          Memo
            A value of zero assumes that no leaves are killed initially, but this value could be reset in an Operation to reflect, for example, an insect browsing attack, frost kill of foliage, or a pruning operation that removes leaves.
        Constant MinimumLAI: FixedValue=0.01; Units=m^2/m^2
        MultiplyFunction SpecificLeafAreaFunction
          LinearInterpolationFunction SpecificLeafAreaPot
            XYPairs: X=[0, 1, 2, 3, 8]; Y=[0.019, 0.018, 0.017, 0.016, 0.015]
            Memo
              Data for SLA (m^2/g)came from Medhurst and Beadle (2001) and Gonzalez-Garcia et al (2016). Values and trends were similar. A generalised pattern should suffice for many applicatinos, but cultivar-specific patterns are available for some cultivars and could be used to slighly refine their simulation. These data are also similar to those in [rance2014assessment].
            VariableReference XValue: VariableName=[Pinus].Age
          LinearInterpolationFunction CO2Modifier
            XYPairs: X=[350, 850]; Y=[1, 0.8]
            VariableReference XValue: VariableName=[IWeather].CO2
        LinearInterpolationFunction LeafResidenceTime
          XYPairs: X=[0, 1, 2, 3, 8]; Y=[800, 800, 800, 800, 800]
          Memo
            This function specifies that lead residence time increases with age. Values are based on [laclau2009influence].
          VariableReference XValue: VariableName=[Pinus].Age
        MultiplyFunction LeafDevelopmentRate
          Constant LDR: FixedValue=1; Units=0-1
          WeightedTemperatureFunction FT: MaximumTemperatureWeighting=1
            XYPairs: X=[8, 26, 33, 34]; Y=[0, 1, 1, 0]
              Memo
                This is an assumed and tuned function of leaf development rate in relation to weighted air temperature.
        Constant CarbonConcentration: FixedValue=0.45; Units=g/g
          Memo
            This value is based on [ribeiro2015aboveground].
        ExpressionFunction HeightFunction: Expression=[Stem].Ht*1000
          Memo
            This converts stem height in m to mm for use else where in the model.
        BiomassDemand DMDemands
          Memo
            DM demands are set in a similar ways for each organ, but with different values: structural (default specified), metabolic (value = 0), and storage functions (1 - structural). Values measured range from about 5 to 50% for Pinus leaves ([quentin2015non]), which also covers the range of 1-20% for other species and plant parts ([hoch2003non]). Metabolic demand is set to zero, because RUE is a value for net growth for which a respiration calculation is not needed. These values may become an important focus if one attempts to use the model for coppicing, as is already the case in several other APSIM models, e.g. lucerne and gliricidia.
          MultiplyFunction Structural
            PartitionFractionDemandFunction DMDemandFunction
              LinearInterpolationFunction PartitionFraction
                XYPairs: X=[0, 1000, 10000]; Y=[0.19, 0.19, 0.2]
                VariableReference XValue: VariableName=[Pinus].IndividualTreeLiveWt
            Constant StructuralFraction: FixedValue=0.99; Units=0-1
          Constant Metabolic: FixedValue=0
          Constant Storage: FixedValue=0
        BiomassDemand NDemands
          Memo
            N demands are set in a similar ways to DM demands, which are described above.
          MultiplyFunction Structural
            VariableReference MinNconc: VariableName=[Leaf].minimumNconc
            VariableReference PotentialDMAllocation: VariableName=[Leaf].potentialDMAllocation.Structural
          Constant Metabolic: FixedValue=0
          StorageNDemandFunction Storage
            VariableReference MaxNconc: VariableName=[Leaf].MaximumNconc
            Constant NitrogenDemandSwitch: FixedValue=1
      GenericOrgan Branch: IsAboveGround=true
        Memo
          For many of the parameters in this organ, see comments for similar parameters in the leaf organ.
        Constant NReallocationFactor: FixedValue=0; Units=/d
        Constant NRetranslocationFactor: FixedValue=0.05; Units=/d
        PhaseLookupValue NitrogenDemandSwitch: Start=Emergence; End=Old
          Constant: FixedValue=1
        Constant DMRetranslocationFactor: FixedValue=0; Units=/d
        Constant SenescenceRate: FixedValue=0; Units=/d
        Constant MaximumNConc: FixedValue=0.01; Units=g/g
        Constant MinimumNConc: FixedValue=0.0014; Units=g/g
        Constant DetachmentRateFunction: FixedValue=0; Units=/d
        Constant MaintenanceRespirationFunction: FixedValue=0; Units=0-1
        Constant DMConversionEfficiency: FixedValue=1; Units=0-1
        BiomassRemoval BiomassRemovalDefaults
          OrganBiomassRemovalType Harvest: FractionLiveToRemove=0; FractionDeadToRemove=0; FractionLiveToResidue=1; FractionDeadToResidue=1
          OrganBiomassRemovalType Cut: FractionLiveToRemove=0.8; FractionDeadToRemove=0; FractionLiveToResidue=0; FractionDeadToResidue=0
          OrganBiomassRemovalType Prune: FractionLiveToRemove=0; FractionDeadToRemove=0; FractionLiveToResidue=0.6; FractionDeadToResidue=0
          OrganBiomassRemovalType Thin: FractionLiveToRemove=0; FractionDeadToRemove=0; FractionLiveToResidue=0.05; FractionDeadToResidue=0
        Constant DMReallocationFactor: FixedValue=0; Units=/d
        VariableReference CriticalNConc: VariableName=[Branch].MinimumNConc
        Constant RemobilisationCost: FixedValue=0
        Constant CarbonConcentration: FixedValue=0.45; Units=g/g
        BiomassDemand DMDemands
          Memo
            DM or N demands here are set in a similar way to those described above for the leaf organ.
          MultiplyFunction Structural
            PartitionFractionDemandFunction DMDemandFunction
              LinearInterpolationFunction PartitionFraction
                XYPairs: X=[0, 1000, 10000]; Y=[0.2, 0.2, 0.15]
                VariableReference XValue: VariableName=[Pinus].IndividualTreeLiveWt
            Constant StructuralFraction: FixedValue=0.99; Units=0-1
          Constant Metabolic: FixedValue=0
          StorageDMDemandFunction Storage
            SubtractFunction StorageFraction
              Constant One: FixedValue=1
              VariableReference StructuralFraction: VariableName=[Branch].DMDemands.Structural.StructuralFraction
        BiomassDemand NDemands
          Memo
            DM or N demands here are set in a similar way to those described above for the leaf organ.
          MultiplyFunction Structural
            VariableReference MinNconc: VariableName=[Branch].minimumNconc
            VariableReference PotentialDMAllocation: VariableName=[Branch].potentialDMAllocation.Structural
          MultiplyFunction Metabolic
            SubtractFunction MetabolicNconc
              VariableReference CritNconc: VariableName=[Branch].criticalNConc
              VariableReference MinNconc: VariableName=[Branch].minimumNconc
            VariableReference PotentialDMAllocation: VariableName=[Branch].potentialDMAllocation.Structural
          StorageNDemandFunction Storage
            VariableReference NitrogenDemandSwitch: VariableName=[Branch].nitrogenDemandSwitch
            VariableReference MaxNconc: VariableName=[Branch].maximumNconc
        RetranslocateNonStructural RetranslocateNitrogen
        BiomassDemand InitialWt
          Constant Structural: FixedValue=0; Units=g
          Constant Metabolic: FixedValue=0
          Constant Storage: FixedValue=0
      GenericOrgan Stem: IsAboveGround=true
        BiomassDemand InitialWt
          Constant Structural: FixedValue=0; Units=g
          Constant Metabolic: FixedValue=0
          Constant Storage: FixedValue=0
        Memo
          For many of the parameters in this organ, see comments for similar parameters in the leaf organ.
        Constant NReallocationFactor: FixedValue=0; Units=/d
        Constant NRetranslocationFactor: FixedValue=0.05; Units=/d
        PhaseLookupValue NitrogenDemandSwitch: Start=Emergence; End=Old
          Constant: FixedValue=1
        Constant DMRetranslocationFactor: FixedValue=0; Units=/d
        LinearInterpolationFunction SenescenceRate
          XYPairs: X=[0, 2500, 5000, 10000, 20000, 40000, 80000, 160000]; Y=[0, 0, 0, 0, 0, 0, 0, 0]
          VariableReference XValue: VariableName=[Pinus].Stem.WoodWt
        Constant MaximumNConc: FixedValue=0.01; Units=g/g
          Memo
            Branch, stem and coarse root minimum N concentrations are based on [raymond2000effect].
        Constant MinimumNConc: FixedValue=0.0014; Units=g/g
        Constant DetachmentRateFunction: FixedValue=0.05; Units=/d
        Constant MaintenanceRespirationFunction: FixedValue=0; Units=0-1
        Constant DMConversionEfficiency: FixedValue=1; Units=0-1
        BiomassRemoval BiomassRemovalDefaults
          OrganBiomassRemovalType Harvest: FractionLiveToRemove=1; FractionDeadToRemove=1; FractionLiveToResidue=0; FractionDeadToResidue=0
          OrganBiomassRemovalType Cut: FractionLiveToRemove=0.8; FractionDeadToRemove=0; FractionLiveToResidue=0; FractionDeadToResidue=0
          OrganBiomassRemovalType Prune: FractionLiveToRemove=0; FractionDeadToRemove=0; FractionLiveToResidue=0.6; FractionDeadToResidue=0
          OrganBiomassRemovalType Thin: FractionLiveToRemove=0; FractionDeadToRemove=0; FractionLiveToResidue=0.05; FractionDeadToResidue=0
        Constant DMReallocationFactor: FixedValue=0; Units=/d
        VariableReference CriticalNConc: VariableName=[Stem].MinimumNConc
        Constant CarbonConcentration: FixedValue=0.45; Units=g/g
        Constant RemobilisationCost: FixedValue=0
        RetranslocateNonStructural RetranslocateNitrogen
        LessThanFunction DBH
          VariableReference IndStemWt: VariableName=[Pinus].IndividualTreeStemWt
          Constant MinimumIndStemWt: FixedValue=10000
          Constant Zero: FixedValue=0
          ExpressionFunction DBHEquation: Expression=0.07*([Pinus].IndividualTreeStemWt^0.5)
            Memo
              Stem volume is calculated as concical volume with the base of the cone the same diameter as at breast height (1.3 m height). Units are m3 stem/ha.
        LessThanFunction BarkThickness
          VariableReference Criterion: VariableName=[Pinus].IndividualTreeStemWt
          Constant LowLimit: FixedValue=10000
          Constant Zero: FixedValue=0
          LinearInterpolationFunction BarkThickness
            VariableReference XValue: VariableName=[Pinus].Stem.DBH
            XYPairs: X=[0, 8, 12, 16, 20, 24, 28]; Y=[1, 1, 1, 1, 1, 1, 1]
        LessThanFunction DBHub
          VariableReference Criterion: VariableName=[Pinus].IndividualTreeStemWt
          Constant LowLimit: FixedValue=10000
          Constant Zero: FixedValue=0
          ExpressionFunction DBHEquation: Expression=[Pinus].Stem.DBH-[Pinus].Stem.BarkThickness*2
            Memo
              Stem volume is calculated as concical volume with the base of the cone the same diameter as at breast height (1.3 m height). Units are m3 stem/ha.
        ExpressionFunction BA: Expression=([Pinus].Stem.DBH/2)^2*3.14159*[Pinus].Population
        ExpressionFunction BAub: Expression=([Pinus].Stem.DBHub/2)^2*3.14159*[Pinus].Population
        MaximumFunction Ht
          Constant MinimumHeight: FixedValue=3; Units=m
          ExpressionFunction HeightFunction
            Expression=-13.3371+(1.38*[Pinus].Stem.DBH^0.96)+(0.57*([Pinus].Population*10000)^0.46)
        LessThanFunction Vol
          VariableReference Criterion: VariableName=[Pinus].IndividualTreeStemWt
          Constant LowLimit: FixedValue=10000
          Constant Zero: FixedValue=0
          ExpressionFunction VolumeEquation
            Expression=(((((([Pinus].Stem.DBH)/2)^2)*3.14159)/3)*([Pinus].Stem.Ht*100))*[Pinus].Population*10000/1000000
            Memo
              Stem volume is calculated as concical volume with the base of the cone the same diameter as at breast height (1.3 m height). Units are m3 stem/ha.
        ExpressionFunction VolBark
          Expression=[Pinus].Stem.Ht*((([Pinus].Stem.DBH/2)^2-([Pinus].Stem.DBHub/2)^2)*3.14159/3)*[Pinus].Population
        ExpressionFunction Volub: Expression=[Pinus].Stem.Vol-[Pinus].Stem.VolBark
        ExpressionFunction MAI: Expression=[Pinus].Stem.Vol/[Pinus].Age
        ExpressionFunction MAIub: Expression=[Pinus].Stem.Volub/[Pinus].Age
        LessThanFunction WoodWt
          VariableReference Criterion: VariableName=[Pinus].IndividualTreeStemWt
          Constant LowLimit: FixedValue=10000
          Constant Zero: FixedValue=0
          MultiplyFunction WoodWt
            LinearInterpolationFunction WoodWtFactor
              VariableReference XValue: VariableName=[Pinus].Stem.Live.Wt
              XYPairs: X=[0, 2000, 10000, 20000, 100000]; Y=[0.5, 0.8, 0.9, 0.9, 0.9]
            VariableReference StemWt: VariableName=[Pinus].Stem.Live.Wt
        ExpressionFunction BarkWtOLD: Expression=[Pinus].Stem.Live.Wt-[Pinus].Stem.WoodWt
        LessThanFunction WoodDensity
          VariableReference Criterion: VariableName=[Pinus].IndividualTreeStemWt
          Constant LowLimit: FixedValue=10000
          Constant Zero: FixedValue=0
          ExpressionFunction WoodDensity: Expression=[Pinus].Stem.WoodWt*10/[Pinus].Stem.Volub
            Memo
              Stem volume is calculated as concical volume with the base of the cone the same diameter as at breast height (1.3 m height). Units are m3 stem/ha.
        BiomassDemand DMDemands
          Memo
            DM or N demands here are set in a similar way to those described above for the leaf organ.
          MultiplyFunction Structural
            PartitionFractionDemandFunction DMDemandFunction
              LinearInterpolationFunction PartitionFraction
                XYPairs: X=[0, 2000, 10000]; Y=[0.1, 0.45, 0.6]
                VariableReference XValue: VariableName=[Pinus].IndividualTreeLiveWt
            Constant StructuralFraction: FixedValue=0.99; Units=0-1
          Constant Metabolic: FixedValue=0
          StorageDMDemandFunction Storage
            SubtractFunction StorageFraction
              Constant One: FixedValue=1
              VariableReference StructuralFraction: VariableName=[Stem].DMDemands.Structural.StructuralFraction
        BiomassDemand NDemands
          Memo
            DM or N demands here are set in a similar way to those described above for the leaf organ.
          MultiplyFunction Structural
            VariableReference MinNconc: VariableName=[Stem].minimumNconc
            VariableReference PotentialDMAllocation: VariableName=[Stem].potentialDMAllocation.Structural
          MultiplyFunction Metabolic
            SubtractFunction MetabolicNconc
              VariableReference CritNconc: VariableName=[Stem].criticalNConc
              VariableReference MinNconc: VariableName=[Stem].minimumNconc
            VariableReference PotentialDMAllocation: VariableName=[Stem].potentialDMAllocation.Structural
          StorageNDemandFunction Storage
            VariableReference NitrogenDemandSwitch: VariableName=[Stem].nitrogenDemandSwitch
            VariableReference MaxNconc: VariableName=[Stem].maximumNconc
        LessThanFunction BarkDensity
          VariableReference Criterion: VariableName=[Pinus].IndividualTreeStemWt
          Constant LowLimit: FixedValue=10000
          Constant Zero: FixedValue=0
          ExpressionFunction WoodDensity: Expression=[Pinus].Stem.BarkWt*10/[Pinus].Stem.VolBark
            Memo
              Stem volume is calculated as concical volume with the base of the cone the same diameter as at breast height (1.3 m height). Units are m3 stem/ha.
        LessThanFunction BarkWt
          VariableReference Criterion: VariableName=[Pinus].IndividualTreeStemWt
          Constant LowLimit: FixedValue=10000
          Constant Zero: FixedValue=0
          ExpressionFunction BarkWt: Expression=[Pinus].Stem.Live.Wt-[Pinus].Stem.WoodWt
      GenericOrgan CoarseRoot: IsAboveGround=true
        Memo
          For many of the parameters in this organ, see comments for similar parameters in the leaf organ.
        Constant NReallocationFactor: FixedValue=0; Units=/d
        Constant NRetranslocationFactor: FixedValue=0.05; Units=/d
        PhaseLookupValue NitrogenDemandSwitch: Start=Emergence; End=Old
          Constant: FixedValue=1
        Constant DMRetranslocationFactor: FixedValue=0; Units=0-1
        Constant SenescenceRate: FixedValue=0; Units=/d
        Constant MaximumNConc: FixedValue=0.01; Units=g/g
        Constant MinimumNConc: FixedValue=0.0014; Units=g/g
        Constant DetachmentRateFunction: FixedValue=0; Units=/d
        Constant MaintenanceRespirationFunction: FixedValue=0; Units=0-1
        Constant DMConversionEfficiency: FixedValue=1; Units=0-1
        BiomassRemoval BiomassRemovalDefaults: same as Replacements.Pinus.Branch.BiomassRemovalDefaults
        Constant DMReallocationFactor: FixedValue=0; Units=0-1
        VariableReference CriticalNConc: VariableName=[Stem].MinimumNConc
        Constant RemobilisationCost: FixedValue=0
        Constant CarbonConcentration: FixedValue=0.45; Units=g/g
        BiomassDemand DMDemands
          Memo
            DM or N demands here are set in a similar way to those described above for the leaf organ.
          MultiplyFunction Structural
            PartitionFractionDemandFunction DMDemandFunction
              LinearInterpolationFunction PartitionFraction
                XYPairs: X=[0, 1000, 10000]; Y=[0.02, 0.1, 0.2]
                VariableReference XValue: VariableName=[Pinus].IndividualTreeLiveWt
            Constant StructuralFraction: FixedValue=0.99; Units=0-1
          Constant Metabolic: FixedValue=0
          StorageDMDemandFunction Storage
            SubtractFunction StorageFraction
              Constant One: FixedValue=1
              VariableReference StructuralFraction: VariableName=[CoarseRoot].DMDemands.Structural.StructuralFraction
        BiomassDemand NDemands
          Memo
            DM or N demands here are set in a similar way to those described above for the leaf organ.
          MultiplyFunction Structural
            VariableReference MinNconc: VariableName=[CoarseRoot].minimumNconc
            VariableReference PotentialDMAllocation: VariableName=[CoarseRoot].potentialDMAllocation.Structural
          MultiplyFunction Metabolic
            SubtractFunction MetabolicNconc
              VariableReference CritNconc: VariableName=[CoarseRoot].criticalNConc
              VariableReference MinNconc: VariableName=[CoarseRoot].minimumNconc
            VariableReference PotentialDMAllocation: VariableName=[CoarseRoot].potentialDMAllocation.Structural
          StorageNDemandFunction Storage
            VariableReference NitrogenDemandSwitch: VariableName=[CoarseRoot].nitrogenDemandSwitch
            VariableReference MaxNconc: VariableName=[CoarseRoot].maximumNconc
        RetranslocateNonStructural RetranslocateNitrogen
        BiomassDemand InitialWt
          Constant Structural: FixedValue=0; Units=g
          Constant Metabolic: FixedValue=0
          Constant Storage: FixedValue=0
      Root FineRoot: GrowthRespiration=0; MaintenanceRespiration=0
        RootShapeCylindre RootShape
        Memo
          For many of the parameters in this organ, see comments for similar parameters in the leaf organ.
        PhaseLookupValue NitrogenDemandSwitch: Start=Emergence; End=Old
          Constant: FixedValue=1
        Constant RootFrontVelocity: FixedValue=10; Units=mm/d
          Memo
            [huth_managing_2008] measured a constant root front velocity of 24.3 mm/d down to 1.4 m depth under favourable growing conditions, which was similar to wheat. [goncalves2013integrating] report eucalypt root front velocities averaging 19 mm/day for the first 1.5 years to 12 mm/day by 3.5 years in conditions of little impedence to root growth. The value of 10 mm/d used here is lower to reflect more common limiting conditions.
        Constant SenescenceRate: FixedValue=0.005; Units=/d
        Constant MaxDailyNUptake: FixedValue=0.5; Units=kg/ha/d
        Constant MaximumNConc: FixedValue=0.01; Units=g/g
          Memo
            Fine root N concentrations are based on Misra et al (1998).
        Constant MinimumNConc: FixedValue=0.003; Units=g/g
        Constant MaximumRootDepth: FixedValue=10000; Units=mm
        Constant KLModifier: FixedValue=1
        Constant KNO3: FixedValue=0.03
        Constant KNH4: FixedValue=3e-06
        LinearInterpolationFunction NUptakeSWFactor
          XYPairs: X=[0, 1]; Y=[0, 1]
          VariableReference XValue: VariableName=[Root].RWC
        Constant SpecificRootLength: FixedValue=40; Units=m/g
          Memo
            Specific root length was based on [jourdan2008fine].
        BiomassRemoval BiomassRemovalDefaults
          OrganBiomassRemovalType Harvest: FractionLiveToRemove=0; FractionDeadToRemove=0; FractionLiveToResidue=1; FractionDeadToResidue=1
          OrganBiomassRemovalType Cut: FractionLiveToRemove=0.8; FractionDeadToRemove=0; FractionLiveToResidue=0; FractionDeadToResidue=0
          OrganBiomassRemovalType Prune: FractionLiveToRemove=0; FractionDeadToRemove=0; FractionLiveToResidue=0.6; FractionDeadToResidue=0
        Constant DMConversionEfficiency: FixedValue=1; Units=0-1
        Constant MaintenanceRespirationFunction: FixedValue=0; Units=0-1
        Constant RemobilisationCost: FixedValue=0
        Constant CarbonConcentration: FixedValue=0.45; Units=g/g
        BiomassDemand DMDemands
          Memo
            DM or N demands here are set in a similar way to those described above for the leaf organ.
          MultiplyFunction Structural
            PartitionFractionDemandFunction DMDemandFunction
              Constant PartitionFraction: FixedValue=0.45
            Constant StructuralFraction: FixedValue=1
          Constant Metabolic: FixedValue=0
          StorageDMDemandFunction Storage
            SubtractFunction StorageFraction
              Constant One: FixedValue=1
              VariableReference StructuralFraction: VariableName=[FineRoot].DMDemands.Structural.StructuralFraction
        BiomassDemand NDemands
          Memo
            DM or N demands here are set in a similar way to those described above for the leaf organ.
          MultiplyFunction Structural
            VariableReference MinNconc: VariableName=[FineRoot].minimumNconc
            VariableReference PotentialDMAllocation: VariableName=[FineRoot].potentialDMAllocation.Structural
          MultiplyFunction Metabolic
            SubtractFunction MetabolicNconc
              VariableReference CritNconc: VariableName=[FineRoot].criticalNConc
              VariableReference MinNconc: VariableName=[FineRoot].minimumNconc
            VariableReference PotentialDMAllocation: VariableName=[FineRoot].potentialDMAllocation.Structural
          StorageNDemandFunction Storage
            VariableReference NitrogenDemandSwitch: VariableName=[FineRoot].nitrogenDemandSwitch
            VariableReference MaxNconc: VariableName=[FineRoot].maximumNconc
        VariableReference CriticalNConc: VariableName=[Root].MinimumNConc
        BiomassDemand InitialWt
          Constant Structural: FixedValue=0.2; Units=g/plant
          Constant Metabolic: FixedValue=0
          Constant Storage: FixedValue=0
        Constant RootDepthStressFactor: FixedValue=1
      DivideFunction RootShootRatio
        VariableReference Numerator: VariableName=[Pinus].BelowGround.Wt
        VariableReference Denominator: VariableName=[Pinus].AboveGround.Wt
      CultivarFolder radiata
        Cultivar radiata
      CultivarFolder elliottii
        Cultivar elliottii
      CultivarFolder taeda
        Cultivar taeda
      CultivarFolder elliottiiXcaribaea
        Cultivar elliottiiXcaribaea
  DataStore
    ExcelInput Observed: FileNames=[Observed.xlsx]; SheetNames=[Observed]
    PredictedObserved: PredictedTableName=Report; ObservedTableName=Observed; FieldNameUsedForMatch=SimulationID; FieldName2UsedForMatch=Clock.Today; AllColumns=false
    PredictedObserved PredictedObservedSoilWater (disabled): PredictedTableName=ReportSoilWater; ObservedTableName=Observed; FieldNameUsedForMatch=SimulationID; FieldName2UsedForMatch=Clock.Today; AllColumns=false
  Folder Validation
    Memo ValidationIntro
      Validation datasets have been included to assist with validation during model development. Validation datasets cover a range of environmental (soil and climate) conditions, management options (populations, nitrogen rates, irrigation) and genetic backgrounds (different regions, provenence, clones).  These datasets have been grouped and ordered in this simulation by country, and alphebetically within country.  Graphs of model performance are provided for biomass production and canopy development. Where a dataset did not include aboveground biomass, but instead a related parameter like stem volume or biomass, the latter was converted to aboveground biomass by a regression based on the rest of the validation dataset.

      Observed data are shown compared to predictions.
    Memo Genotype note
      This genotype specification was used to specifiy partitioning to roots and shoots for the C15 clone used by the Aracruz company (then Fibria, and now Suzano), in order to approximate the root:shoot ratios reported in [almeida].
    Folder Combined Validation
      Memo
        These observed versus predicted graphs include all validation datasets and timesteps within a site for which observed data were available.
    Folder Australia Temperate
      Folder BFG
        Experiment BF
          Factors
            Factor G: Specification=[Management]
              Operations C
                1973-12-31  [TreeThinning].Script.DoThin(0.05);
                1974-12-31  [TreeThinning].Script.DoThin(0.05);
                1975-12-31  [TreeThinning].Script.DoThin(0.05);
                1976-12-31  [TreeThinning].Script.DoThin(0.05);
                1977-12-31  [TreeThinning].Script.DoThin(0.05);
                1978-12-31  [TreeThinning].Script.DoThin(0.05);
                1979-12-31  [TreeThinning].Script.DoThin(0.05);
                1980-12-31  [TreeThinning].Script.DoThin(0.05);
                1981-12-31  [TreeThinning].Script.DoThin(0.05);
                1982-12-31  [TreeThinning].Script.DoThin(0.01);
                1983-12-31  [TreeThinning].Script.DoThin(0.00);
                1984-12-31  [TreeThinning].Script.DoThin(0.00);
                1985-12-31  [TreeThinning].Script.DoThin(0.00);
                1986-12-31  [TreeThinning].Script.DoThin(0.00);
                1987-12-31  [TreeThinning].Script.DoThin(0.00);
                1988-12-31  [TreeThinning].Script.DoThin(0.56);
                1989-12-31  [TreeThinning].Script.DoThin(0.00);
                1990-12-31  [TreeThinning].Script.DoThin(0.00);
              Operations F
                1973-12-31  [TreeThinning].Script.DoThin(0.05);
                1974-12-31  [TreeThinning].Script.DoThin(0.05);
                1975-12-31  [TreeThinning].Script.DoThin(0.05);
                1976-12-31  [TreeThinning].Script.DoThin(0.05);
                1977-12-31  [TreeThinning].Script.DoThin(0.05);
                1978-12-31  [TreeThinning].Script.DoThin(0.05);
                1979-12-31  [TreeThinning].Script.DoThin(0.05);
                1980-12-31  [TreeThinning].Script.DoThin(0.05);
                1981-12-31  [TreeThinning].Script.DoThin(0.05);
                1982-12-31  [TreeThinning].Script.DoThin(0.05);
                1983-12-31  [TreeThinning].Script.DoThin(0.00);
                1984-12-31  [TreeThinning].Script.DoThin(0.06);
                1985-12-31  [TreeThinning].Script.DoThin(0.04);
                1986-12-31  [TreeThinning].Script.DoThin(0.00);
                1987-12-31  [TreeThinning].Script.DoThin(0.00);
                1988-01-31  [TreeThinning].Script.DoThin(0.03);
                1988-12-31  [TreeThinning].Script.DoThin(0.47);
                1989-12-31  [TreeThinning].Script.DoThin(0.00);
                1990-12-31  [TreeThinning].Script.DoThin(0.00);
                1983-09-28  [Fertiliser].Apply(Amount: 200, Type: Fertiliser.Types.NH4N, 0)
                1983-11-18  [Fertiliser].Apply(Amount: 200, Type: Fertiliser.Types.NH4N, 0)
              Operations I
                1973-12-31  [TreeThinning].Script.DoThin(0.05);
                1974-12-31  [TreeThinning].Script.DoThin(0.05);
                1975-12-31  [TreeThinning].Script.DoThin(0.05);
                1976-12-31  [TreeThinning].Script.DoThin(0.05);
                1977-12-31  [TreeThinning].Script.DoThin(0.05);
                1978-12-31  [TreeThinning].Script.DoThin(0.05);
                1979-12-31  [TreeThinning].Script.DoThin(0.05);
                1980-12-31  [TreeThinning].Script.DoThin(0.05);
                1981-12-31  [TreeThinning].Script.DoThin(0.05);
                1982-12-31  [TreeThinning].Script.DoThin(0.01);
                1983-12-31  [TreeThinning].Script.DoThin(0.00);
                1984-12-31  [TreeThinning].Script.DoThin(0.00);
                1985-12-31  [TreeThinning].Script.DoThin(0.00);
                1986-12-31  [TreeThinning].Script.DoThin(0.00);
                1987-12-31  [TreeThinning].Script.DoThin(0.00);
                1988-12-31  [TreeThinning].Script.DoThin(0.56);
                1989-12-31  [TreeThinning].Script.DoThin(0.00);
                1990-12-31  [TreeThinning].Script.DoThin(0.00);
                1984-08-15  [AutomaticIrrigation].Script.TurnOn()
                1988-08-15  [AutomaticIrrigation].Script.TurnOff()
              Operations IF
                1973-12-31  [TreeThinning].Script.DoThin(0.05);
                1974-12-31  [TreeThinning].Script.DoThin(0.05);
                1975-12-31  [TreeThinning].Script.DoThin(0.05);
                1976-12-31  [TreeThinning].Script.DoThin(0.05);
                1977-12-31  [TreeThinning].Script.DoThin(0.05);
                1978-12-31  [TreeThinning].Script.DoThin(0.05);
                1979-12-31  [TreeThinning].Script.DoThin(0.05);
                1980-12-31  [TreeThinning].Script.DoThin(0.05);
                1981-12-31  [TreeThinning].Script.DoThin(0.05);
                1982-12-31  [TreeThinning].Script.DoThin(0.01);
                1983-12-31  [TreeThinning].Script.DoThin(0.00);
                1984-12-31  [TreeThinning].Script.DoThin(0.00);
                1985-12-31  [TreeThinning].Script.DoThin(0.00);
                1986-12-31  [TreeThinning].Script.DoThin(0.00);
                1987-12-31  [TreeThinning].Script.DoThin(0.00);
                1988-12-31  [TreeThinning].Script.DoThin(0.56);
                1989-12-31  [TreeThinning].Script.DoThin(0.00);
                1990-12-31  [TreeThinning].Script.DoThin(0.00);
                1983-09-28  [Fertiliser].Apply(Amount: 200, Type: Fertiliser.Types.NH4N, 0)
                1983-11-18  [Fertiliser].Apply(Amount: 200, Type: Fertiliser.Types.NH4N, 0)
                1984-08-15  [AutomaticIrrigation].Script.TurnOn()
                2003-08-15  [AutomaticIrrigation].Script.TurnOff()
          Simulation BFG
            Weather: FileName=BFG1900-2020.met
            Clock: Start=1973-05-01; End=2001-06-15
            Summary
            SoilArbitrator Soil Arbitrator
            Zone Plantation: Area=1; Slope=0; AspectAngle=0; Altitude=50
              Soil Synthetic Soil BFG: ASCOrder=NA; ASCSubOrder=NA; SoilType=Loam over Clay Loam; Site=30395_43104; NearestTown=HALL; Region=South Eastern Highlands; State=ACT; NaturalVegetation=Cleared, non-native vegetation, buildings; ApsoilNumber=9999; Latitude=-35.33; Longitude=148.92; LocationAccuracy=+- 90m; YearOfSampling=2020; Comments=Landuse is Plantation forestry
                DataSource=Soil and Landscape Grid of Australia. This soil parameter file was automatically generated from the GSM National Surfaces using pedotransfer functions.
                Physical
                  Thickness  BD       AirDry  LL15  DUL   SAT   KS
                  100        1.44687  0.02    0.03  0.18  0.25  250
                  100        1.58103  0.01    0.02  0.18  0.25  220
                  250        1.55808  0.01    0.02  0.2   0.25  200
                  150        1.52404  0.03    0.04  0.22  0.25  150
                  200        1.54524  0.07    0.08  0.23  0.25  25
                  200        1.5848   0.07    0.08  0.2   0.25  50
                  500        1.585    0.08    0.09  0.18  0.25  100
                  500        1.585    0.08    0.09  0.19  0.25  100
                  SoilCrop PinusSoil: LL=[0.175, 0.175, 0.195, 0.215, 0.225, 0.195, 0.175, 0.185]; KL=[0.05, 0.04, 0.03, 0.03, 0.02, 0.01, 0.01, 0.01]; XF=[0.9, 0.9, 0.9, 0.9, 0.6, 0.4, 0.2, 0.1]
                InitialWater Initial water: PercentMethod=1; FractionFull=0.5
                Sample Initial conditions: SWUnits=Volumetric; OCUnits=Total; PHUnits=Water
                  Thickness  NO3  NH4  SW
                  100        2    2    0.17
                  100        1    1    0.17
                  250        0.5  0.5  0.19
                  150        0    0    0.21
                  200        0    0    0.22
                  200        0    0    0.19
                  500        0    0    0.17
                  500        0    0    0.18
                WaterBalance SoilWater: SummerDate=1-nov; SummerU=6; SummerCona=6; WinterDate=1-apr; WinterU=2; WinterCona=2; DiffusConst=111.892; DiffusSlope=39.2384; Salb=0.13; CN2Bare=78; CNRed=20; CNCov=0; Slope=8.63724; DischargeWidth=10; CatchmentArea=6537.54; Thickness=[100, 100, 250, 150, 200, 200, 500, 500]; SWCON=[0.4, 0.4, 0.4, 0.1, 0.1, 0.1, 0.1, 0.1]
                Organic: FOMCNRatio=40
                  Thickness  Carbon  SoilCNRatio  FBiom    FInert    FOM
                  100        1.7     14           0.04     0.3       475.475
                  100        0.6     14           0.03106  0.4       303.176
                  250        0.4     14           0.01404  0.6       193.314
                  150        0.2     14           0.01     0.786997  123.262
                  200        0.1     14           0.01     0.982222  67.6477
                  200        0.05    14           0.01     0.935805  37.1259
                  500        0.05    14           0.01     0.936     37.126
                  500        0.05    14           0.01     0.936     37.126
                Chemical
                  Thickness  NO3N  NH4N  PH
                  100        2     2     5.7
                  100        1     1     5.5
                  250        0.5   0.5   5.3
                  150        0     0     5.33751
                  200        0     0     5.38374
                  200        0     0     5.42226
                  500        0     0     5.422
                  500        0     0     5.422
                CERESSoilTemperature
                Nutrient
              Irrigation
              Fertiliser
              SurfaceOrganicMatter: InitialResidueName=Pinus; InitialResidueType=Eucalyptus; InitialResidueMass=0; InitialStandingFraction=0; InitialCPR=0; InitialCNR=0
              MicroClimate: a_interception=0; b_interception=1; c_interception=0; d_interception=0; soil_albedo=0.13; SoilHeatFluxFraction=0; MinimumHeightDiffForNewLayer=0; NightInterceptionFraction=0; ReferenceHeight=0
              Manager TreeSowingRule
                RowSpace = 2.71
                RowWidth = 3.7
                CultivarName = radiata
                SowingDate = 06/16/1973 00:00:00
```csharp
using Models.PMF;
using Models.Core;
using System;
namespace Models
{
    [Serializable] 
    [System.Xml.Serialization.XmlInclude(typeof(Model))]
    public class Script : Model
    {
        [Link] Plant Plant;
        [Link] Clock Clock;

        [Description("Spacing (m) between plants within rows")]
        public double RowSpace { get; set; }
        [Description("Spacing (m) between rows")]
        public double RowWidth { get; set; }

        [Description("Cultivar")]
        [Display(Type=DisplayType.CultivarName)]
        public string CultivarName { get; set; }
        [Description("Sowing Date")]
        public DateTime SowingDate { get; set; }

        [EventSubscribe("DoManagement")]
        private void OnDoManagement(object sender, EventArgs e)
        {
            double PlantPopulation = 1 / (RowWidth * RowSpace);

            if (Clock.Today.Date == SowingDate)
                Plant.Sow(population: PlantPopulation, 
                    cultivar: CultivarName, 
                    depth: 100, 
                    rowSpacing: 150);
            //Plant.Sow(... Contains the following arguements:
            //Population  double  Required  Seeds sowing/m2
            //Cultivar    string  Required  "NameOfCultivar"
            //Depth       double  Optional  Depth (mm) seed sown.   Default is 100mm 
            //MaxCover    double  Optional  Proportion (0-1) of the ground row crop will cover.   Default is 1.0
            //BudNumber   double  Optional  Number of mainstems per seed sown.  Default is 1.0
            //RowSpacing  double  Optional  Spaceing (mm) between drill rows when crop is sown.  Default is 150mm
            //CropClass   string  Optional  Crop class to instantiate when crop is sown.  Default is "Plant"
        }
    }
}
```
              Manager TreeThinning
```csharp
using System.Xml.Serialization;
using Models.PMF.Interfaces;
using Models.PMF;
using Models.Core;
using System.Collections.Generic;
using System;

namespace Models
{
    [Serializable] 
    [System.Xml.Serialization.XmlInclude(typeof(Model))]
    public class Script : Model
    {
        [Link] Plant Pinus;
        [Link] Clock Clock;

        [XmlIgnore] private RemovalFractions Remove { get; set; }
        
        [EventSubscribe("StartOfSimulation")]
        private void OnSimulationCommencing(object sender, EventArgs e)
        {
            Remove = new RemovalFractions();
        }
        
        [EventSubscribe("DoManagement")]
        public void DoThin(double ThinFr)
        {
            //Set up  array of remove fractions to send with Cut method.  Each member in the array corresponds to an organ in the same order they are set up in.

                //Harvest with manager specified removal fractions
                Remove.SetFractionToRemove("Leaf", 0);
                Remove.SetFractionToRemove("Stem", 0);
                Remove.SetFractionToRemove("Branch", 0);
                Remove.SetFractionToRemove("FineRoot", 0);
                Remove.SetFractionToRemove("CoarseRoot", 0);
                Remove.SetFractionToResidue("Leaf", ThinFr);
                Remove.SetFractionToResidue("Stem", ThinFr);
                Remove.SetFractionToResidue("Branch", ThinFr);
                Remove.SetFractionToResidue("FineRoot", ThinFr);
                Remove.SetFractionToResidue("CoarseRoot", ThinFr);
                Remove.SetThinningProportion = ThinFr;
                Pinus.RemoveBiomass("Thin", Remove);
                Pinus.Population = Pinus.Population*(1-ThinFr);
        }
    }
}
```
              Operations Management
                1993-08-20  [Fertiliser].Apply(Amount: 200, Type: Fertiliser.Types.NO3N, 0)
                1994-08-20  [Fertiliser].Apply(Amount: 200, Type: Fertiliser.Types.NO3N, 0)
                1995-08-20  [Fertiliser].Apply(Amount: 200, Type: Fertiliser.Types.NO3N, 0)
                1996-08-20  [Fertiliser].Apply(Amount: 200, Type: Fertiliser.Types.NO3N, 0)
                1997-08-20  [Fertiliser].Apply(Amount: 200, Type: Fertiliser.Types.NO3N, 0)
                1998-08-20  [Fertiliser].Apply(Amount: 200, Type: Fertiliser.Types.NO3N, 0)
                1999-08-20  [Fertiliser].Apply(Amount: 200, Type: Fertiliser.Types.NO3N, 0)
                2000-08-20  [Fertiliser].Apply(Amount: 200, Type: Fertiliser.Types.NO3N, 0)
                2001-08-20  [Fertiliser].Apply(Amount: 200, Type: Fertiliser.Types.NO3N, 0)
                2002-08-20  [Fertiliser].Apply(Amount: 200, Type: Fertiliser.Types.NO3N, 0)
                2003-08-20  [Fertiliser].Apply(Amount: 200, Type: Fertiliser.Types.NO3N, 0)
                2004-08-20  [Fertiliser].Apply(Amount: 200, Type: Fertiliser.Types.NO3N, 0)
                2005-08-20  [Fertiliser].Apply(Amount: 200, Type: Fertiliser.Types.NO3N, 0)
                2006-08-20  [Fertiliser].Apply(Amount: 200, Type: Fertiliser.Types.NO3N, 0)
                2007-08-20  [Fertiliser].Apply(Amount: 200, Type: Fertiliser.Types.NO3N, 0)
                // 1984-08-15  [AutomaticIrrigation].Script.allowIrrigation.Equals(true)
                // 1985-08-15  [AutomaticIrrigation].Script.allowIrrigation.Equals(true)
              Report: EventNames=[Clock].DoReport
                VariableNames:
                  [Clock].Today
                  [Pinus].Phenology.CurrentPhase.Name
                  [Pinus].Phenology.StageCode
                  [Pinus].Root.NSupplyUptake
                  [Soil].SoilWater.Eo
                  [Soil].SoilWater.Es
                  [Soil].SoilWater.Drainage
                  [Soil].SoilWater.Runoff
                  [Soil].SoilWater.pond
                  [Pinus].AboveGround.Wt
                  [Pinus].BelowGround.Wt
                  [Pinus].Total.Wt
                  [Pinus].Leaf.Dead.Wt
                  [Pinus].Leaf.Live.Wt
                  [Pinus].Stem.Dead.Wt
                  [Pinus].Stem.Live.Wt
                  [Pinus].Root.Dead.Wt
                  [Pinus].Root.Live.Wt
                  [Pinus].AboveGround.N
                  [Pinus].BelowGround.N
                  [Pinus].Total.N
                  [Pinus].TotalLive.N
                  [Pinus].TotalDead.N
                  [Pinus].Leaf.Dead.N
                  [Pinus].Leaf.Live.N
                  [Pinus].Stem.Dead.N
                  [Pinus].Stem.Live.N
                  [Pinus].Root.Live.N
                  [Pinus].Root.Dead.N
                  [Pinus].Leaf.Live.NConc
                  [Pinus].Leaf.Dead.NConc
                  [Pinus].Stem.Live.NConc
                  [Pinus].Root.Live.NConc
                  [Pinus].Root.WaterSupply
                  [Pinus].Root.WaterUptake
                  [Pinus].Leaf.Transpiration
                  [Pinus].Leaf.WaterDemand
                  [Pinus].Root.Depth
                  [Pinus].Leaf.CoverGreen
                  [Pinus].Leaf.CoverTotal
                  [Pinus].Leaf.CoverDead
                  [Pinus].Leaf.LAI
                  [Pinus].Leaf.LAIDead
                  [Pinus].Leaf.Fn
                  [Pinus].Leaf.Fw
                  [Pinus].Leaf.Photosynthesis.FT
                  [Pinus].Leaf.Photosynthesis.FVPD
                  [Pinus].Stem.MinimumNConc
                  [Pinus].Root.MinimumNConc
                  [Pinus].Stem.MaximumNConc
                  [Pinus].Root.MaximumNConc
                  [Pinus].TotalLive.Wt
                  [Pinus].Stem.Live.StructuralWt
                  [Pinus].Stem.Live.StorageWt
                  [Pinus].Leaf.SpecificArea
                  [Pinus].TotalDead.Wt
                  [Soil].SoilWater.SWmm
                  [Soil].SoilNitrogen.NO3.kgha
                  [Pinus].Arbitrator.N.TotalPlantDemand
                  [Pinus].Leaf.LAIFunction.SpecificLeafArea
                  [Pinus].IndividualTreeLiveWt
                  [Pinus].Age
                  [Pinus].Leaf.Photosynthesis
                  [Pinus].Arbitrator.N.TotalPlantSupply
                  ([SurfaceOrganicMatter].Wt / 10)  as Litter
              Plant Pinus
                Memo: same as Replacements.Pinus.Memo
                AccumulateFunction Age: same as Replacements.Pinus.Age
                Phenology: same as Replacements.Pinus.Phenology
                OrganArbitrator Arbitrator: same as Replacements.Pinus.Arbitrator
                CompositeBiomass AboveGround: DMDOfStructural=0.6
                  Propertys=[[Branch].Live, [Branch].Dead, [Leaf].Live, [Leaf].Dead, [Stem].Live, [Stem].Dead]
                CompositeBiomass BelowGround: DMDOfStructural=0.6
                  Propertys=[[FineRoot].Live, [FineRoot].Dead, [CoarseRoot].Live, [CoarseRoot].Dead]
                CompositeBiomass Wood: Propertys=[[Stem].Live, [Stem].Dead, [Branch].Live, [Branch].Dead]; DMDOfStructural=0.6
                CompositeBiomass Total: DMDOfStructural=0.6
                  Propertys=[[Leaf].Live, [Leaf].Dead, [Stem].Live, [Stem].Dead, [FineRoot].Live, [FineRoot].Dead, [CoarseRoot].Live, [CoarseRoot].Dead]
                  Memo
                    Note that this  property does not include branches.
                CompositeBiomass TotalLive: DMDOfStructural=0.6
                  Propertys=[[Leaf].Live, [Stem].Live, [FineRoot].Live, [CoarseRoot].Live, [Branch].Live]
                  Memo
                    Note that this  property does not include branches, and it is used to calculate IndividualTreeLiveWt.
                CompositeBiomass TotalDead: DMDOfStructural=0.6
                  Propertys=[[Leaf].Dead, [Stem].Dead, [FineRoot].Dead, [CoarseRoot].Dead]
                  Memo
                    Note that this  property does not include branches.
                DivideFunction IndividualTreeLiveWt
                  VariableReference LiveWt: VariableName=[Pinus].TotalLive.Wt
                  VariableReference Population: VariableName=[Pinus].Population
                  Memo
                    Note that this  property does not include branches. It is used in calculating DM Demands of several plant components.
                DivideFunction IndividualTreeStemWt
                  VariableReference LiveWt: VariableName=[Pinus].Stem.Wt
                  VariableReference Population: VariableName=[Pinus].Population
                PerennialLeaf Leaf: MaintenanceRespiration=0; GrowthRespiration=0; Albedo=0.15; Gsmax350=0.005; R50=200; LAI=0; Height=0; FRGR=0; PotentialEP=0; WaterDemand=0
                  ExpressionFunction CO2internal: Expression=(163 - [IWeather].MeanT)/(5 - 0.1*[IWeather].MeanT)
                  DivideFunction StomatalConductanceCO2Modifier
                    VariableReference FCO2: VariableName=[Leaf].Photosynthesis.FCO2
                    ExpressionFunction RelativeCO2Gradient
                      Expression=([IWeather].CO2 - [Leaf].CO2internal)/(350 - [Leaf].CO2internal)
                  MultiplyFunction InitialWtFunction: same as Replacements.Pinus.Leaf.InitialWtFunction
                  Constant LaiDeadFunction: FixedValue=0; Units=m^2/m^2
                  MinimumFunction FRGRFunction
                    HourlyInterpolation FRGRFunctionTemp: agregationMethod=0
                      XYPairs Response: X=[5, 20, 25, 35]; Y=[0, 1, 1, 0]
                        Memo
                          This is an assumed temperature response function.
                      ThreeHourSin InterpolationMethod
                  ExpressionFunction ExtinctionCoefficient: same as Replacements.Pinus.Leaf.ExtinctionCoefficient
                  Constant ExtinctionCoefficientDead: FixedValue=0.5
                  Constant MaximumNConc: FixedValue=0.03; Units=g/g
                    Memo
                      Foliar N concentrations are based on [leuning1991spatial].
                  Constant MinimumNConc: FixedValue=0.01; Units=g/g
                    Memo
                      This is an assumed value.
                  Constant NReallocationFactor: FixedValue=0; Units=/d
                    Memo
                      A value of zero assumes there is no N reallocation.
                  WeightedTemperatureFunction SenescenceRate: MaximumTemperatureWeighting=0
                    XYPairs: X=[-5, -2, 0, 2, 2.1]; Y=[0, 0, 0, 0, 0]
                  BiomassRemoval BiomassRemovalDefaults: same as Replacements.Pinus.Leaf.BiomassRemovalDefaults
                  Constant DMConversionEfficiency: FixedValue=1; Units=g/g
                  Constant LeafDetachmentTime: FixedValue=14; Units=d
                    Memo
                      A value here is the number of days between senseence and detachment. A value of 14 days is assumed.
                  Constant DetachmentRateFunction: same as Replacements.Pinus.Leaf.DetachmentRateFunction
                  Constant DMRetranslocationFactor: FixedValue=0; Units=/d
                  Constant NRetranslocationFactor: FixedValue=0; Units=/d
                  RUEModel Photosynthesis
                    Constant RUE: FixedValue=1.4; Units=g/MJ
                      Memo
                        Aboveground RUE for Gliricidia was measured as 1.06 g/MJ by [harrington1995radiation]. Adding c. 0.3 for belowground allocation provides a value of 1.4 g/MJ.
                    MinimumFunction FT
                      WeightedTemperatureFunction FTDaytime: MaximumTemperatureWeighting=0.75
                        XYPairs: X=[5, 20, 25, 35]; Y=[0, 1, 1, 0]
                      WeightedTemperatureFunction FTFrost: MaximumTemperatureWeighting=0
                        XYPairs: X=[-5, 0, 2]; Y=[1, 1, 1]
                    LinearInterpolationFunction FVPD: same as Replacements.Pinus.Leaf.Photosynthesis.FVPD
                    LinearInterpolationFunction FN: same as Replacements.Pinus.Leaf.Photosynthesis.FN
                    LinearInterpolationFunction FW: same as Replacements.Pinus.Leaf.Photosynthesis.FW
                    RUECO2Function FCO2: PhotosyntheticPathway=C3
                    VariableReference RadnInt: VariableName=[Leaf].RadIntTot
                  Constant LeafKillFraction: FixedValue=0; Units=0-1
                    Memo
                      A value of zero assumes that no leaves are killed initially, but this value could be reset in an Operation to reflect, for example, an insect browsing attack, frost kill of foliage, or a pruning operation that removes leaves.
                  Constant MinimumLAI: FixedValue=0.01; Units=m^2/m^2
                  MultiplyFunction SpecificLeafAreaFunction
                    LinearInterpolationFunction SpecificLeafAreaPot
                      XYPairs: X=[0, 1, 2, 3, 8]; Y=[0.016, 0.0105, 0.0089, 0.0085, 0.0073]
                      Memo
                        Data for SLA (m^2/g)came from [borges2009parametrizaccao] and [almeida2003comparison]. Values and trends were similar. A generalised pattern should suffice for many applicatinos, but cultivar-specific patterns are available for some cultivars and could be used to slighly refine their simulation. These data are also similar to those in [rance2014assessment].
                      VariableReference XValue: VariableName=[Pinus].Age
                    LinearInterpolationFunction CO2Modifier
                      XYPairs: X=[350, 850]; Y=[1, 0.8]
                      VariableReference XValue: VariableName=[IWeather].CO2
                  LinearInterpolationFunction LeafResidenceTime
                    XYPairs: X=[0, 1, 2, 3, 8]; Y=[100, 140, 180, 220, 280]
                    Memo
                      This function specifies that lead residence time increases with age. Values are based on [laclau2009influence].
                    VariableReference XValue: VariableName=[Pinus].Age
                  MultiplyFunction LeafDevelopmentRate
                    Constant LDR: FixedValue=1; Units=0-1
                    WeightedTemperatureFunction FT: MaximumTemperatureWeighting=1
                      XYPairs: X=[10, 26, 33, 34]; Y=[0, 1, 1, 0]
                        Memo
                          This is an assumed and tuned function of leaf development rate in relation to weighted air temperature.
                  Constant CarbonConcentration: FixedValue=0.45; Units=g/g
                    Memo
                      This value is based on [ribeiro2015aboveground].
                  ExpressionFunction HeightFunction: Expression=[Stem].Ht*1000
                    Memo
                      This converts stem height in m to mm for use else where in the model.
                  BiomassDemand DMDemands: same as Replacements.Pinus.Leaf.DMDemands
                  BiomassDemand NDemands: same as Replacements.Pinus.Leaf.NDemands
                GenericOrgan Branch: IsAboveGround=true
                  Memo
                    For many of the parameters in this organ, see comments for similar parameters in the leaf organ.
                  Constant NReallocationFactor: FixedValue=0; Units=/d
                  Constant NRetranslocationFactor: FixedValue=0.05; Units=/d
                  PhaseLookupValue NitrogenDemandSwitch: Start=Emergence; End=Old
                    Constant: FixedValue=1
                  Constant DMRetranslocationFactor: FixedValue=0; Units=/d
                  Constant SenescenceRate: FixedValue=0; Units=/d
                  Constant MaximumNConc: FixedValue=0.01; Units=g/g
                  Constant MinimumNConc: FixedValue=0.0014; Units=g/g
                  Constant DetachmentRateFunction: FixedValue=0; Units=/d
                  Constant MaintenanceRespirationFunction: FixedValue=0; Units=0-1
                  Constant DMConversionEfficiency: FixedValue=1; Units=0-1
                  BiomassRemoval BiomassRemovalDefaults: same as Replacements.Pinus.Branch.BiomassRemovalDefaults
                  Constant DMReallocationFactor: FixedValue=0; Units=/d
                  VariableReference CriticalNConc: VariableName=[Branch].MinimumNConc
                  Constant RemobilisationCost: FixedValue=0
                  Constant CarbonConcentration: FixedValue=0.45; Units=g/g
                  BiomassDemand DMDemands
                    Memo
                      DM or N demands here are set in a similar way to those described above for the leaf organ.
                    MultiplyFunction Structural
                      PartitionFractionDemandFunction DMDemandFunction
                        LinearInterpolationFunction PartitionFraction
                          XYPairs: X=[0, 1000, 10000]; Y=[0.06, 0.06, 0.06]
                          VariableReference XValue: VariableName=[Pinus].IndividualTreeLiveWt
                      Constant StructuralFraction: FixedValue=0.99; Units=0-1
                    Constant Metabolic: FixedValue=0
                    StorageDMDemandFunction Storage
                      SubtractFunction StorageFraction
                        Constant One: FixedValue=1
                        VariableReference StructuralFraction: VariableName=[Branch].DMDemands.Structural.StructuralFraction
                  BiomassDemand NDemands: same as Replacements.Pinus.Branch.NDemands
                  RetranslocateNonStructural RetranslocateNitrogen
                  BiomassDemand InitialWt
                    Constant Structural: FixedValue=0; Units=g
                    Constant Metabolic: FixedValue=0
                    Constant Storage: FixedValue=0
                GenericOrgan Stem: IsAboveGround=true
                  Memo
                    For many of the parameters in this organ, see comments for similar parameters in the leaf organ.
                  Constant NReallocationFactor: FixedValue=0; Units=/d
                  Constant NRetranslocationFactor: FixedValue=0.05; Units=/d
                  PhaseLookupValue NitrogenDemandSwitch: Start=Emergence; End=Old
                    Constant: FixedValue=1
                  Constant DMRetranslocationFactor: FixedValue=0; Units=/d
                  Constant SenescenceRate: FixedValue=0; Units=/d
                  Constant MaximumNConc: FixedValue=0.01; Units=g/g
                    Memo
                      Branch, stem and coarse root minimum N concentrations are based on [raymond2000effect].
                  Constant MinimumNConc: FixedValue=0.0014; Units=g/g
                  Constant DetachmentRateFunction: FixedValue=0; Units=/d
                  Constant MaintenanceRespirationFunction: FixedValue=0; Units=0-1
                  Constant DMConversionEfficiency: FixedValue=1; Units=0-1
                  BiomassRemoval BiomassRemovalDefaults: same as Replacements.Pinus.Stem.BiomassRemovalDefaults
                  Constant DMReallocationFactor: FixedValue=0; Units=/d
                  VariableReference CriticalNConc: VariableName=[Stem].MinimumNConc
                  Constant CarbonConcentration: FixedValue=0.45; Units=g/g
                  Constant RemobilisationCost: FixedValue=0
                  ExpressionFunction DBH: Expression=0.685*([Pinus].AboveGround.Wt^0.3262)
                  MaximumFunction Ht
                    ExpressionFunction HeightFunction: Expression=0.5201*([Pinus].Stem.DBH^1.3604)
                    Constant MinimumHeight: FixedValue=0.1; Units=m
                  LessThanFunction Vol
                    VariableReference Height: VariableName=[Stem].Ht
                    Constant MinimumHeight: FixedValue=2
                    Constant Zero: FixedValue=0
                    ExpressionFunction VolumeEquation
                      Expression=(((((([Pinus].Stem.DBH)/2)^2)*3.14159)/3)*([Pinus].Stem.Ht*100))*[Pinus].Population*10000/1000000
                      Memo
                        Stem volume is calculated as concical volume with the base of the cone the same diameter as at breast height (1.3 m height). Units are m3 stem/ha.
                  ExpressionFunction MAI: Expression=[Pinus].Stem.Vol/[Pinus].Age
                    Memo
                      MAI = Mean Annual Increment (m3/ha/year) of stem

                      MAI, which is based on stem volume, depends entirely on the allometric equation used for DBH, and on which Ht in-turn is direclty based. The Brazilian dataset on which these relationships were based did not include large trees. It is likely that the relationships over-predict DBH, Ht, Vol and MAI at larger sizes than included in the calibration dataset, which may have been a problem for the Gympie and Coffs sites. Although Coffs in the validation dataset included large trees, DBH and Ht data were not avialable from that site to include in the calibration. The developers of this model encourage redefinition of the DBH, Ht and Vol functions for specific future applications that include large trees.
                  BiomassDemand DMDemands
                    Memo
                      DM or N demands here are set in a similar way to those described above for the leaf organ.
                    MultiplyFunction Structural
                      PartitionFractionDemandFunction DMDemandFunction
                        LinearInterpolationFunction PartitionFraction
                          XYPairs: X=[0, 2000, 10000]; Y=[0.35, 0.45, 0.58]
                          VariableReference XValue: VariableName=[Pinus].IndividualTreeLiveWt
                      Constant StructuralFraction: FixedValue=0.99; Units=0-1
                    Constant Metabolic: FixedValue=0
                    StorageDMDemandFunction Storage
                      SubtractFunction StorageFraction
                        Constant One: FixedValue=1
                        VariableReference StructuralFraction: VariableName=[Stem].DMDemands.Structural.StructuralFraction
                  BiomassDemand NDemands: same as Replacements.Pinus.Stem.NDemands
                  RetranslocateNonStructural RetranslocateNitrogen
                  BiomassDemand InitialWt
                    Constant Structural: FixedValue=0; Units=g
                    Constant Metabolic: FixedValue=0
                    Constant Storage: FixedValue=0
                GenericOrgan CoarseRoot: IsAboveGround=true
                  Memo
                    For many of the parameters in this organ, see comments for similar parameters in the leaf organ.
                  Constant NReallocationFactor: FixedValue=0; Units=/d
                  Constant NRetranslocationFactor: FixedValue=0.05; Units=/d
                  PhaseLookupValue NitrogenDemandSwitch: Start=Emergence; End=Old
                    Constant: FixedValue=1
                  Constant DMRetranslocationFactor: FixedValue=0; Units=0-1
                  Constant SenescenceRate: FixedValue=0; Units=/d
                  Constant MaximumNConc: FixedValue=0.01; Units=g/g
                  Constant MinimumNConc: FixedValue=0.0014; Units=g/g
                  Constant DetachmentRateFunction: FixedValue=0; Units=/d
                  Constant MaintenanceRespirationFunction: FixedValue=0; Units=0-1
                  Constant DMConversionEfficiency: FixedValue=1; Units=0-1
                  BiomassRemoval BiomassRemovalDefaults: same as Replacements.Pinus.Branch.BiomassRemovalDefaults
                  Constant DMReallocationFactor: FixedValue=0; Units=0-1
                  VariableReference CriticalNConc: VariableName=[Stem].MinimumNConc
                  Constant RemobilisationCost: FixedValue=0
                  Constant CarbonConcentration: FixedValue=0.45; Units=g/g
                  BiomassDemand DMDemands
                    Memo
                      DM or N demands here are set in a similar way to those described above for the leaf organ.
                    MultiplyFunction Structural
                      PartitionFractionDemandFunction DMDemandFunction
                        LinearInterpolationFunction PartitionFraction
                          XYPairs: X=[0, 1000, 10000]; Y=[0.01, 0.03, 0.05]
                          VariableReference XValue: VariableName=[Pinus].IndividualTreeLiveWt
                      Constant StructuralFraction: FixedValue=0.99; Units=0-1
                    Constant Metabolic: FixedValue=0
                    StorageDMDemandFunction Storage
                      SubtractFunction StorageFraction
                        Constant One: FixedValue=1
                        VariableReference StructuralFraction: VariableName=[CoarseRoot].DMDemands.Structural.StructuralFraction
                  BiomassDemand NDemands: same as Replacements.Pinus.CoarseRoot.NDemands
                  RetranslocateNonStructural RetranslocateNitrogen
                  BiomassDemand InitialWt
                    Constant Structural: FixedValue=0; Units=g
                    Constant Metabolic: FixedValue=0
                    Constant Storage: FixedValue=0
                Root FineRoot: GrowthRespiration=0; MaintenanceRespiration=0
                  RootShapeCylindre RootShape
                  Memo
                    For many of the parameters in this organ, see comments for similar parameters in the leaf organ.
                  PhaseLookupValue NitrogenDemandSwitch: Start=Emergence; End=Old
                    Constant: FixedValue=1
                  Constant RootFrontVelocity: same as Replacements.Pinus.FineRoot.RootFrontVelocity
                  Constant SenescenceRate: FixedValue=0.005; Units=/d
                  Constant MaxDailyNUptake: FixedValue=6; Units=kg/ha/d
                  Constant MaximumNConc: FixedValue=0.01; Units=g/g
                    Memo
                      Fine root N concentrations are based on [gordon2000nutrient].
                  Constant MinimumNConc: FixedValue=0.003; Units=g/g
                  Constant MaximumRootDepth: FixedValue=10000; Units=mm
                  Constant KLModifier: FixedValue=1
                  Constant KNO3: FixedValue=0.03
                  Constant KNH4: FixedValue=3e-06
                  LinearInterpolationFunction NUptakeSWFactor
                    XYPairs: X=[0, 1]; Y=[0, 1]
                    VariableReference XValue: VariableName=[Root].RWC
                  Constant SpecificRootLength: FixedValue=40; Units=m/g
                    Memo
                      Specific root length was based on [jourdan2008fine].
                  BiomassRemoval BiomassRemovalDefaults: same as Replacements.Pinus.FineRoot.BiomassRemovalDefaults
                  Constant DMConversionEfficiency: FixedValue=1; Units=0-1
                  Constant MaintenanceRespirationFunction: FixedValue=0; Units=0-1
                  Constant RemobilisationCost: FixedValue=0
                  Constant CarbonConcentration: FixedValue=0.45; Units=g/g
                  BiomassDemand DMDemands
                    Memo
                      DM or N demands here are set in a similar way to those described above for the leaf organ.
                    MultiplyFunction Structural
                      PartitionFractionDemandFunction DMDemandFunction
                        Constant PartitionFraction: FixedValue=0.25
                      Constant StructuralFraction: FixedValue=1
                    Constant Metabolic: FixedValue=0
                    StorageDMDemandFunction Storage
                      SubtractFunction StorageFraction
                        Constant One: FixedValue=1
                        VariableReference StructuralFraction: VariableName=[FineRoot].DMDemands.Structural.StructuralFraction
                  BiomassDemand NDemands: same as Replacements.Pinus.FineRoot.NDemands
                  VariableReference CriticalNConc: VariableName=[Root].MinimumNConc
                  BiomassDemand InitialWt
                    Constant Structural: FixedValue=0.2; Units=g/plant
                    Constant Metabolic: FixedValue=0
                    Constant Storage: FixedValue=0
                  Constant RootDepthStressFactor: FixedValue=1
                DivideFunction RootShootRatio
                  VariableReference Numerator: VariableName=[Pinus].BelowGround.Wt
                  VariableReference Denominator: VariableName=[Pinus].AboveGround.Wt
                CultivarFolder grandis
                  Cultivar grandis
                    Memo Genotype note
                      This genotype specification was originally planned to be for the species E. grandis in general, but we did not actually provide any specific parameters. As no parameter values were changed here, generic Pinus parameters were used where this genotype was specified in a simulation.
                  Cultivar grandisCoffsHarbour
                    Memo Genotype note
                      This genotype specification is for a Coffs Harbour provenance of E. grandis, but as no actually genotype-specific parameters are specified, simulations using this genotype use the unchanged parameter set of the main Pinus model.
                  Cultivar grandisC15
                    Command:
                      [CoarseRoot].DMDemands.Structural.DMDemandFunction.PartitionFraction.XYPairs.X=0,1000,10000
                      [CoarseRoot].DMDemands.Structural.DMDemandFunction.PartitionFraction.XYPairs.Y=0,0.03,0.07
                      [Leaf].DMDemands.Structural.DMDemandFunction.PartitionFraction.XYPairs.X=0,1000,5000,10000,20000,50000,80000
                      [Leaf].DMDemands.Structural.DMDemandFunction.PartitionFraction.XYPairs.Y=0.1,0.19,0.24,0.24,0.23,0.22,0.15
                      [Branch].DMDemands.Structural.DMDemandFunction.PartitionFraction.XYPairs.X=0,1000,10000,20000,50000,80000
                      [Branch].DMDemands.Structural.DMDemandFunction.PartitionFraction.XYPairs.Y=.06,.06,.06,.06,.06,.06
                      [FineRoot].DMDemands.Structural.DMDemandFunction.PartitionFraction.FixedValue=0.27
                      [Stem].DMDemands.Structural.DMDemandFunction.PartitionFraction.XYPairs.X=0,1000,5000,10000,20000,30000,80000
                      [Stem].DMDemands.Structural.DMDemandFunction.PartitionFraction.XYPairs.Y=0.2,0.45,0.9,0.99,0.99,0.99,.99
                    Memo Genotype note
                      This genotype specification was used to specifiy partitioning to for the C15 clone used by the Aracruz company (now Fibria), in order to approximate the root:shoot ratios reported in [almeida].
                  Cultivar grandisC22
                    Command:
                      [CoarseRoot].DMDemands.Structural.DMDemandFunction.PartitionFraction.XYPairs.X=0,1000,10000
                      [CoarseRoot].DMDemands.Structural.DMDemandFunction.PartitionFraction.XYPairs.Y=0,0.07,0.10
                      [Leaf].DMDemands.Structural.DMDemandFunction.PartitionFraction.XYPairs.X=0,1000,5000,10000,20000,50000,80000
                      [Leaf].DMDemands.Structural.DMDemandFunction.PartitionFraction.XYPairs.Y=0.1,0.16,0.24,0.17,.16,0.15,.1
                      [Branch].DMDemands.Structural.DMDemandFunction.PartitionFraction.XYPairs.X=0,1000,10000,20000,50000,80000
                      [Branch].DMDemands.Structural.DMDemandFunction.PartitionFraction.XYPairs.Y=.06,.06,.06,.05,.04,.03
                      [FineRoot].DMDemands.Structural.DMDemandFunction.PartitionFraction.FixedValue=0.27
                      [Stem].DMDemands.Structural.DMDemandFunction.PartitionFraction.XYPairs.X=0,1000,5000,10000,20000,30000,80000
                      [Stem].DMDemands.Structural.DMDemandFunction.PartitionFraction.XYPairs.Y=0.2,0.45,0.5,0.6,0.9,0.9,.9
                    Memo Genotype note
                      This genotype specification was used to specifiy partitioning to for the C22 clone used by the Aracruz company (now Fibria), in order to approximate the root:shoot ratios reported in [almeida].
                CultivarFolder grandisXurophylla
                  Cultivar grandisXurophylla
                    Memo Genotype note
                      This genotype specification was originally planned to be for a cline of grandisXurophylla, but we did not actually provide any specific parameters. As no parameter values were changed here, generic Pinus parameters were used where this genotype was specified in a simulation.
                  Cultivar grandisXurophyllaC3334
                    Memo Genotype note
                      This genotype specification was originally planned to be for the clone C3334, but we did not actually provide any specific parameters. As no parameter values were changed here, generic Pinus parameters were used where this genotype was specified in a simulation.
                  Cultivar grandisXurophyllaC3336
                    Memo Genotype note
                      This genotype specification was originally planned to be for the clone C3336, but we did not actually provide any specific parameters. As no parameter values were changed here, generic Pinus parameters were used where this genotype was specified in a simulation.
                CultivarFolder urophyllaXglobulus
                  Cultivar urophyllaXglobulus
                    Memo Genotype note
                      This genotype specification was originally planned to be for the urophyllaXglobulus hybird of E. grandis, but we did not actually provide any specific parameters. As no parameter values were changed here, generic Pinus parameters were used where this genotype was specified in a simulation.
                CultivarFolder BrazilClones
                  Cultivar BrazilPlasticClone
                    Command:
                      [Leaf].Photosynthesis.RUE.FixedValue = 1.51
                      [Leaf].ExtinctionCoefficient.KYoungTrees.FixedValue = 0.34
                      [Leaf].ExtinctionCoefficient.KMatureTrees.FixedValue = 0.60
                      [Stem].DMDemands.Structural.DMDemandFunction.PartitionFraction.XYPairs.X=0,2000,10000
                      [Stem].DMDemands.Structural.DMDemandFunction.PartitionFraction.XYPairs.Y=0.15, 0.39, 0.61
                      [Branch].DMDemands.Structural.DMDemandFunction.PartitionFraction.XYPairs.X=0,2000,10000
                      [Branch].DMDemands.Structural.DMDemandFunction.PartitionFraction.XYPairs.Y=0.09,0.09,0.09
                      [Leaf].DMDemands.Structural.DMDemandFunction.PartitionFraction.XYPairs.X=0,2000,10000
                      [Leaf].DMDemands.Structural.DMDemandFunction.PartitionFraction.XYPairs.Y= 0.2, 0.17, 0.15
                      [Leaf].Photosynthesis.FT.FTDaytime.XYPairs.X=  8, 18, 23, 40
                      [Leaf].Photosynthesis.FT.FTDaytime.XYPairs.Y 0, 1, 1, 0
                      [Leaf].Photosynthesis.FT.FTFrost.XYPairs.X= -5, -2, -1, 0, 1, 2, 2.1
                      [Leaf].Photosynthesis.FT.FTFrost.XYPairs.Y = 0, 0, 0, 0, 0, 0.9, 1
                      [Leaf].SenescenceRate.XYPairs.X=  -5,  -2,  0,    2,  2.1
                      [Leaf].SenescenceRate.XYPairs.Y = 0.7, 0.5, 0.2, 0.1, 0
                      [CoarseRoot].DMDemands.Structural.DMDemandFunction.PartitionFraction.XYPairs.X=0,2000,10000
                      [CoarseRoot].DMDemands.Structural.DMDemandFunction.PartitionFraction.XYPairs.Y=0.005,0.03,0.04
                      [FineRoot].DMDemands.Structural.DMDemandFunction.PartitionFraction.FixedValue = 0.26
                  Cultivar BrazilTropicalClone
                    Command:
                      [Leaf].Photosynthesis.RUE.FixedValue = 1.69
                      [Leaf].ExtinctionCoefficient.KYoungTrees.FixedValue = 0.30
                      [Leaf].ExtinctionCoefficient.KMatureTrees.FixedValue = 0.56
                      [Stem].DMDemands.Structural.DMDemandFunction.PartitionFraction.XYPairs.X=0,2000,10000
                      [Stem].DMDemands.Structural.DMDemandFunction.PartitionFraction.XYPairs.Y=0.15,0.40, 0.64
                      [Branch].DMDemands.Structural.DMDemandFunction.PartitionFraction.XYPairs.X=0,2000,10000
                      [Branch].DMDemands.Structural.DMDemandFunction.PartitionFraction.XYPairs.Y=0.08,0.08,0.08
                      [Leaf].DMDemands.Structural.DMDemandFunction.PartitionFraction.XYPairs.X=0,2000,10000
                      [Leaf].DMDemands.Structural.DMDemandFunction.PartitionFraction.XYPairs.Y= 0.19, 0.17, 0.17
                      [Leaf].Photosynthesis.FT.FTDaytime.XYPairs.X=  8, 18, 23, 40
                      [Leaf].Photosynthesis.FT.FTDaytime.XYPairs.Y 0, 1, 1, 0
                      [Leaf].Photosynthesis.FT.FTFrost.XYPairs.X= -5, -2, -1, 0, 1, 2, 2.1
                      [Leaf].Photosynthesis.FT.FTFrost.XYPairs.Y = 0, 0, 0, 0, 0, 0.9, 1
                      [Leaf].SenescenceRate.XYPairs.X=  -5,  -2,  0,    2,  2.1
                      [Leaf].SenescenceRate.XYPairs.Y = 0.7, 0.5, 0.2, 0.1, 0
                      [CoarseRoot].DMDemands.Structural.DMDemandFunction.PartitionFraction.XYPairs.X=0,2000,10000
                      [CoarseRoot].DMDemands.Structural.DMDemandFunction.PartitionFraction.XYPairs.Y=0.03,0.1,0.1
                      [FineRoot].DMDemands.Structural.DMDemandFunction.PartitionFraction.FixedValue = 0.35
                      [Leaf].SpecificLeafAreaFunction.SpecificLeafAreaPot.XYPairs.X= 0, 1, 2, 3, 4, 80
                      [Leaf].SpecificLeafAreaFunction.SpecificLeafAreaPot.XYPairs.Y= 0.018, 0.014, 0.011, 0.009, 0.008, 0.007
                  Cultivar BrazilSubTropicalClone
                    Command:
                      [Leaf].Photosynthesis.RUE.FixedValue = 1.57
                      [Leaf].ExtinctionCoefficient.KYoungTrees.FixedValue = 0.26
                      [Leaf].ExtinctionCoefficient.KMatureTrees.FixedValue = 0.55
                      [Stem].DMDemands.Structural.DMDemandFunction.PartitionFraction.XYPairs.X=0,2000,10000
                      [Stem].DMDemands.Structural.DMDemandFunction.PartitionFraction.XYPairs.Y=0.15, 0.30, 0.57
                      [Branch].DMDemands.Structural.DMDemandFunction.PartitionFraction.XYPairs.X=0,2000,10000
                      [Branch].DMDemands.Structural.DMDemandFunction.PartitionFraction.XYPairs.Y=0.09,0.09,0.09
                      [Leaf].DMDemands.Structural.DMDemandFunction.PartitionFraction.XYPairs.X=0,2000,10000
                      [Leaf].DMDemands.Structural.DMDemandFunction.PartitionFraction.XYPairs.Y= 0.20, 0.16, 0.15
                      [Leaf].Photosynthesis.FT.FTDaytime.XYPairs.X=  6, 17, 22, 38
                      [Leaf].Photosynthesis.FT.FTDaytime.XYPairs.Y 0, 1, 1, 0
                      [Leaf].Photosynthesis.FT.FTFrost.XYPairs.X= -5, -2, -1, 0, 1, 2, 2.1
                      [Leaf].Photosynthesis.FT.FTFrost.XYPairs.Y = 0.5, 1, 1, 1, 1, 1, 1
                      [Leaf].SenescenceRate.XYPairs.X=  -5,  -2,  0,    2,  2.1
                      [Leaf].SenescenceRate.XYPairs.Y = 0.7, 0.5, 0.2, 0.1, 0
                      [CoarseRoot].DMDemands.Structural.DMDemandFunction.PartitionFraction.XYPairs.X=0,2000,10000
                      [CoarseRoot].DMDemands.Structural.DMDemandFunction.PartitionFraction.XYPairs.Y=0.02,0.05,0.06
                      [FineRoot].DMDemands.Structural.DMDemandFunction.PartitionFraction.FixedValue = 0.24
                      [Leaf].SpecificLeafAreaFunction.SpecificLeafAreaPot.XYPairs.X= 0, 1, 2, 3, 4, 80
                      [Leaf].SpecificLeafAreaFunction.SpecificLeafAreaPot.XYPairs.Y= 0.015, 0.013, 0.009, 0.008, 0.007, 0.007
                CultivarFolder saligna
                  Cultivar saligna
                    Memo Genotype note
                      This genotype specification was originally planned to be for the species E. saligna, but we did not actually provide any specific parameters. As no parameter values were changed here, generic Pinus parameters were used where this genotype was specified in a simulation.
              Manager AutomaticIrrigation
                allowIrrigation = False
                seasonStart = 1-sep
                seasonEnd = 30-mar
                seasonsAllocation = 10000
                triggerDeficit = 90
                targetDeficit = 95
                returndays = 6
                maximumAmount = 30
                depthPAWC = 400
                TopSWdeficit = 0
                TopSWC = 0
                DaysSinceIrrigation = 0
                AmountToApply = 0
                SeasonAppliedAmount = 0
```csharp
using Models.Interfaces;
using System;
using Models.Core;
using Models.PMF;
using Models.Soils;
using System.Xml.Serialization;
using APSIM.Shared.Utilities;



        
namespace Models
{
    [Serializable] 
    [System.Xml.Serialization.XmlInclude(typeof(Model))]
    public class Script : Model
    {
        [Link] private ISummary summary;
        [Link] private Irrigation Irrigation;
        [Link] private Clock Clock;
        [Link] private Soil Soil;
        [Link(IsOptional = true)] private IPlant existingCrop;
        private DateTime StartDate;
        private DateTime EndDate;
        private double TopDUL;
        private double TopLL;
        private int nLayers;
        [Link]
        private IPhysical soilPhysical;
        [Link]
        private ISoilWater waterBalance;
        //Communication to other modules
       
        //User inputs from properties tab
        [Description("Turn irrigation on?")]
        public bool allowIrrigation { get; set; }
        [Description("Start of irrigation season (dd-MMM)")]
        public string seasonStart { get; set; }
        [Description("End of irrigation season (dd-MMM)")]
        public string seasonEnd { get; set; }
        [Description("Season allocation (mm)")]
        public double seasonsAllocation { get; set; }
        [Description("Deficit to trigger irrigation (% PAWC)")]
        public double triggerDeficit { get; set; }
        [Description("Deficit to stop irrigaton (% PAWC)")]
        public double targetDeficit { get; set; }
        [Description("Minimum days for irrigation to return")]
        public double returndays { get; set; }
        [Description("Maximum irrigation application (mm/day)")]
        public double maximumAmount { get; set; }
        [Description("Depth to calculate PAWC (mm)")]
        public double depthPAWC { get; set; }

        //Class members
        [XmlIgnore] public double TopSWdeficit { get; set; }
        [XmlIgnore] public double TopSWC { get; set; }
        [XmlIgnore] public double DaysSinceIrrigation { get; set; }
        [XmlIgnore] public double AmountToApply { get; set; }
        [XmlIgnore] public double SeasonAppliedAmount { get; set; }
        
        private bool IrrigationIsAllowed { get; set; }
        private bool SeasonIsOpen { get; set; }
        private bool CropIsActive { get; set; }
        private bool IrrigatorIsAvailable { get; set; }
        private bool SoilIsDry { get; set; }



        public void TurnOn()
        {
        allowIrrigation=true;
        IrrigationIsAllowed=true;
        }
        public void TurnOff()
        {
        allowIrrigation=false;
        IrrigationIsAllowed=false;
        }


        //Calculate static soil variables
        [EventSubscribe("StartOfSimulation")]
        private void OnStartOfSimulation(object sender, EventArgs e)
        {   
            //Set the season dates
            StartDate = DateTime.Parse(seasonStart + "-" + Clock.Today.Year.ToString());
            EndDate = DateTime.Parse(seasonEnd + "-" + Clock.Today.Year.ToString());
            
            //Can we irrigate at all?
            IrrigationIsAllowed = false; 
            if (allowIrrigation)
                IrrigationIsAllowed = true; 

            //Calculate soil water variables
            double depthFromSurface = 0.0;
            double fracLayer = 0.0;
            nLayers = soilPhysical.Thickness.Length;
            for (int layer = 0; layer < nLayers; layer++)
            {
                fracLayer = Math.Min(1.0, (depthPAWC - depthFromSurface) / soilPhysical.Thickness[layer]);
                TopLL += soilPhysical.LL15mm[layer] * fracLayer;
                TopDUL += soilPhysical.DULmm[layer] * fracLayer;
                depthFromSurface += soilPhysical.Thickness[layer];
                if (depthFromSurface >= depthPAWC)
                    layer = nLayers;
            }
        }
             
        //Determine daily requirement for irrigation
        [EventSubscribe("StartOfDay")]
        private void OnStartOfDay(object sender, EventArgs e)
        {
            //Can we irrigate today?          
            SeasonIsOpen = isBetween(Clock.Today, StartDate, EndDate);
            if (!SeasonIsOpen)
                SeasonAppliedAmount = 0;

            //Is there a crop in the ground that needs irrigation?
            CropIsActive = false;
            if ((existingCrop != null) && (existingCrop.IsAlive))
                CropIsActive = true;
            //if ((existingCrop.Phenology.Stage >= 3.0) && (existingCrop.Phenology.Stage < 6.0))
          
            //Is the irrigator available?
            IrrigatorIsAvailable = false;
            DaysSinceIrrigation += 1;
            if (DaysSinceIrrigation >= returndays)
                IrrigatorIsAvailable = true;
          
            //Is the soil dry enough to require irrigation?
            SoilIsDry = false;
            double depthFromSurface = 0.0;
            double fracLayer = 0.0;
            TopSWC = 0.0;
            for (int layer = 0; layer < nLayers; layer++)
            //for (int layer = 0; depthFromSurface < depthPAWC + soilPhysical.Thickness[layer]; layer++)
            {
                fracLayer = Math.Min(1.0, (depthPAWC - depthFromSurface) / soilPhysical.Thickness[layer]);
                TopSWC += waterBalance.SWmm[layer] * fracLayer;
                depthFromSurface += soilPhysical.Thickness[layer];
                if (depthFromSurface >= depthPAWC)
                    layer = nLayers;
            }
            
            TopSWdeficit = TopSWC - TopDUL;
            if (Math.Max(0.0, -TopSWdeficit) >= (TopDUL - TopLL) * (100 - triggerDeficit) / 100)
                SoilIsDry = true;
                
            //Are all the conditions ratifying irrigation
            if (IrrigationIsAllowed && SeasonIsOpen && CropIsActive && IrrigatorIsAvailable && SoilIsDry)
            {
                //Lets bloody well irrigate then!!!!
                AmountToApply = TopDUL * targetDeficit / 100 - TopSWC;
                AmountToApply = Math.Max(0.0, Math.Min(AmountToApply, seasonsAllocation - SeasonAppliedAmount));
                AmountToApply = Math.Min(AmountToApply,maximumAmount);
                Irrigation.Apply(AmountToApply);
                DaysSinceIrrigation = 0;
                SeasonAppliedAmount += AmountToApply;
            }
        }
        
        ///Checks whether theDate is between iniDate and endDate (non-year specific)
        private bool isBetween(DateTime theDay, DateTime iniDate, DateTime endDate)
        {
            bool result = false;
            if (iniDate.DayOfYear < endDate.DayOfYear)
            {
                // period is within one year, ex: summer in the northern hemisphere
                if ((theDay.DayOfYear >= iniDate.DayOfYear) && (theDay.DayOfYear <= endDate.DayOfYear))
                    result = true;
            }
            else
            {
                // period goes over the end of the year, ex: summer in the southern hemisphere
                if ((theDay.DayOfYear >= iniDate.DayOfYear) || (theDay.DayOfYear <= endDate.DayOfYear))
                    result = true;
            }
            
            return result;
        }
    }
}
```
      Folder Puruki
        Experiment Puruk
          Factors
            Factor i: Specification=[Management]
              Operations Inviolate
                1973-07-15  [TreeThinning].Script.DoThin(0.05);
                1975-07-15  [TreeThinning].Script.DoThin(0.11);
                1976-07-15  [TreeThinning].Script.DoThin(0.02);
                1977-07-15  [TreeThinning].Script.DoThin(0.003);
                1978-07-15  [TreeThinning].Script.DoThin(0.00);
                1979-07-15  [TreeThinning].Script.DoThin(0.01);
                1980-07-15  [TreeThinning].Script.DoThin(0.003);
                1981-07-15  [TreeThinning].Script.DoThin(0.016);
                1982-07-15  [TreeThinning].Script.DoThin(0.067);
                1983-07-15  [TreeThinning].Script.DoThin(0.060);
                1984-07-15  [TreeThinning].Script.DoThin(0.021);
                1985-07-15  [TreeThinning].Script.DoThin(0.037);
                1985-07-15  [TreeThinning].Script.DoThin(0.00);
              Operations Tahi
                1973-07-15  [TreeThinning].Script.DoThin(0.05);
                1975-07-15  [TreeThinning].Script.DoThin(0.113);
                1976-07-15  [TreeThinning].Script.DoThin(0.005);
                1977-07-15  [TreeThinning].Script.DoThin(0);
                1978-07-15  [TreeThinning].Script.DoThin(0.005);
                1979-07-15  [TreeThinning].Script.DoThin(0);
                1979-07-15  [TreeThinning].Script.DoThin(0.746);
                1980-07-15  [TreeThinning].Script.DoThin(0);
                1981-07-15  [TreeThinning].Script.DoThin(0);
                1982-07-15  [TreeThinning].Script.DoThin(0);
                1983-07-14  [TreeThinning].Script.DoThin(0);
                1983-07-15  [TreeThinning].Script.DoThin(0.679);
                1984-07-15  [TreeThinning].Script.DoThin(0.019);
                1985-07-15  [TreeThinning].Script.DoThin(0);
          Simulation Puruki
            Weather: FileName=Puruki1971-2020.met
            Clock: Start=1973-05-01; End=2001-06-15
            Summary
            SoilArbitrator Soil Arbitrator
            Zone Plantation: Area=1; Slope=0; AspectAngle=0; Altitude=50
              Soil SynthSoilPuruki: ASCOrder=NA; ASCSubOrder=NA; SoilType=Aluandic Andosols; Site=NA; NearestTown=NA; Region=NA; State=NA; Country=New Zealand; NaturalVegetation=NA; ApsoilNumber=9999; Latitude=-38.375; Longitude=176.125; LocationAccuracy=+- 250 m; YearOfSampling=2019; DataSource=ISRIC SoilGrids
                Physical
                  Thickness  ParticleSizeClay  ParticleSizeSand  ParticleSizeSilt  BD     AirDry  LL15   DUL    SAT    KS
                  150        27.7              38.7              33.7              0.819  0.096   0.288  0.46   0.615  14.184
                  150        31.5              37                31.5              0.938  0.093   0.28   0.439  0.58   9.093
                  150        34.8              35.8              29.2              0.997  0.093   0.28   0.433  0.565  6.237
                  150        36.2              35.2              27.8              1.034  0.093   0.28   0.428  0.555  5.241
                  200        37.2              35.2              27.3              1.064  0.092   0.278  0.421  0.545  4.667
                  200        37.8              35.8              27.8              1.087  0.091   0.273  0.41   0.535  4.404
                  200        37.9              36                27.9              1.1    0.09    0.27   0.405  0.53   4.328
                  200        37.7              36                27.7              1.104  0.09    0.27   0.405  0.53   4.429
                  300        37.5              36                27.5              1.109  0.09    0.27   0.405  0.53   4.56
                  300        37.1              36                27.2              1.115  0.09    0.27   0.405  0.53   4.721
                  SoilCrop PinusSoil
                    LL=[0.288, 0.28, 0.281, 0.292, 0.306, 0.318, 0.333, 0.351, 0.373, 0.399]
                    KL=[0.06, 0.06, 0.06, 0.055, 0.048, 0.04, 0.032, 0.024, 0.014, 0.003]
                    XF=[1, 1, 1, 1, 1, 1, 1, 1, 0, 0]
                InitialWater Initial water: PercentMethod=0; FractionFull=1
                WaterBalance SoilWater: SummerDate=1-nov; SummerU=6; SummerCona=6; WinterDate=1-apr; WinterU=2; WinterCona=2; DiffusConst=599.26; DiffusSlope=12.09; Salb=0.13; CN2Bare=73; CNRed=20; CNCov=0; Slope=0.5; DischargeWidth=5; CatchmentArea=10; Thickness=[150, 150, 150, 150, 200, 200, 200, 200, 300, 300]
                  SWCON=[0.296, 0.25, 0.209, 0.192, 0.145, 0.139, 0.137, 0.139, 0.102, 0.105]
                Organic: FOMCNRatio=40
                  Thickness  Carbon  SoilCNRatio  FBiom  FInert  FOM
                  150        10      20           0.02   0.1     24.2576
                  150        3.2     17           0.02   0.2     19.3701
                  150        2.6     17           0.01   0.2     15.4673
                  150        1       14           0.01   0.3     12.3509
                  200        0.6     20           0.01   0.4     9.14978
                  200        0.3     15           0.01   0.5     6.77832
                  200        0.2     10           0.01   0.6     5.02151
                  200        0.7     12           0.01   0.7     3.72002
                  300        0.7     12           0.01   0.8     2.37199
                  300        0.7     12           0.01   0.9     1.51245
                Chemical
                  Thickness  NO3N  NH4N  PH
                  150        0     0     5.5
                  150        0     0     5.8
                  150        0     0     5.8
                  150        0     0     6
                  200        0     0     5.8
                  200        0     0     6.5
                  200        0     0     6.7
                  200        0     0     6.4
                  300        0     0     6.4
                  300        0     0     6.4
                Sample Initial conditions: Depth=[0-180]; Thickness=[1800]; NH4=[1]; SWUnits=Volumetric; OCUnits=Total; PHUnits=Water
                CERESSoilTemperature
                Nutrient
              Irrigation
              Fertiliser
              SurfaceOrganicMatter: InitialResidueName=Pinus; InitialResidueType=pasture; InitialResidueMass=1000; InitialStandingFraction=0; InitialCPR=0; InitialCNR=40
              MicroClimate: a_interception=0; b_interception=1; c_interception=0; d_interception=0; soil_albedo=0.13; SoilHeatFluxFraction=0; MinimumHeightDiffForNewLayer=0; NightInterceptionFraction=0; ReferenceHeight=0
              Manager TreeSowingRule
                RowSpace = 1.8
                RowWidth = 2.4
                CultivarName = radiata
                SowingDate = 06/16/1973 00:00:00
                script: same as in Validation.Australia Temperate.BFG.BF.BFG.Plantation.TreeSowingRule
              Manager AutomaticIrrigation (disabled)
                allowIrrigation = False
                seasonStart = 1-sep
                seasonEnd = 30-mar
                seasonsAllocation = 10000
                triggerDeficit = 90
                targetDeficit = 95
                returndays = 6
                maximumAmount = 30
                depthPAWC = 400
                TopSWdeficit = 0
                TopSWC = 0
                DaysSinceIrrigation = 0
                AmountToApply = 0
                SeasonAppliedAmount = 0
```csharp
using Models.Interfaces;
using System;
using Models.Core;
using Models.PMF;
using Models.Soils;
using System.Xml.Serialization;
using APSIM.Shared.Utilities;



        
namespace Models
{
    [Serializable] 
    [System.Xml.Serialization.XmlInclude(typeof(Model))]
    public class Script : Model
    {
        [Link] private ISummary summary;
        [Link] private Irrigation Irrigation;
        [Link] private Clock Clock;
        [Link] private Soil Soil;
        [Link(IsOptional = true)] private IPlant existingCrop;
        private DateTime StartDate;
        private DateTime EndDate;
        private double TopDUL;
        private double TopLL;
        private int nLayers;
        [Link]
        private IPhysical soilPhysical;
        [Link]
        private ISoilWater waterBalance;
        //Communication to other modules
       
        //User inputs from properties tab
        [Description("Turn irrigation on?")]
        public bool allowIrrigation { get; set; }
        [Description("Start of irrigation season (dd-MMM)")]
        public string seasonStart { get; set; }
        [Description("End of irrigation season (dd-MMM)")]
        public string seasonEnd { get; set; }
        [Description("Season allocation (mm)")]
        public double seasonsAllocation { get; set; }
        [Description("Deficit to trigger irrigation (% PAWC)")]
        public double triggerDeficit { get; set; }
        [Description("Deficit to stop irrigaton (% PAWC)")]
        public double targetDeficit { get; set; }
        [Description("Minimum days for irrigation to return")]
        public double returndays { get; set; }
        [Description("Maximum irrigation application (mm/day)")]
        public double maximumAmount { get; set; }
        [Description("Depth to calculate PAWC (mm)")]
        public double depthPAWC { get; set; }

        //Class members
        [XmlIgnore] public double TopSWdeficit { get; set; }
        [XmlIgnore] public double TopSWC { get; set; }
        [XmlIgnore] public double DaysSinceIrrigation { get; set; }
        [XmlIgnore] public double AmountToApply { get; set; }
        [XmlIgnore] public double SeasonAppliedAmount { get; set; }
        
        private bool IrrigationIsAllowed { get; set; }
        private bool SeasonIsOpen { get; set; }
        private bool CropIsActive { get; set; }
        private bool IrrigatorIsAvailable { get; set; }
        private bool SoilIsDry { get; set; }

    
        //Calculate static soil variables
        [EventSubscribe("StartOfSimulation")]
        private void OnStartOfSimulation(object sender, EventArgs e)
        {   
            //Set the season dates
            StartDate = DateTime.Parse(seasonStart + "-" + Clock.Today.Year.ToString());
            EndDate = DateTime.Parse(seasonEnd + "-" + Clock.Today.Year.ToString());
            
            //Can we irrigate at all?
            IrrigationIsAllowed = false; 
            if (allowIrrigation)
                IrrigationIsAllowed = true; 

            //Calculate soil water variables
            double depthFromSurface = 0.0;
            double fracLayer = 0.0;
            nLayers = soilPhysical.Thickness.Length;
            for (int layer = 0; layer < nLayers; layer++)
            {
                fracLayer = Math.Min(1.0, (depthPAWC - depthFromSurface) / soilPhysical.Thickness[layer]);
                TopLL += soilPhysical.LL15mm[layer] * fracLayer;
                TopDUL += soilPhysical.DULmm[layer] * fracLayer;
                depthFromSurface += soilPhysical.Thickness[layer];
                if (depthFromSurface >= depthPAWC)
                    layer = nLayers;
            }
        }
             
        //Determine daily requirement for irrigation
        [EventSubscribe("StartOfDay")]
        private void OnStartOfDay(object sender, EventArgs e)
        {
            //Can we irrigate today?          
            SeasonIsOpen = isBetween(Clock.Today, StartDate, EndDate);
            if (!SeasonIsOpen)
                SeasonAppliedAmount = 0;

            //Is there a crop in the ground that needs irrigation?
            CropIsActive = false;
            if ((existingCrop != null) && (existingCrop.IsAlive))
                CropIsActive = true;
            //if ((existingCrop.Phenology.Stage >= 3.0) && (existingCrop.Phenology.Stage < 6.0))
          
            //Is the irrigator available?
            IrrigatorIsAvailable = false;
            DaysSinceIrrigation += 1;
            if (DaysSinceIrrigation >= returndays)
                IrrigatorIsAvailable = true;
          
            //Is the soil dry enough to require irrigation?
            SoilIsDry = false;
            double depthFromSurface = 0.0;
            double fracLayer = 0.0;
            TopSWC = 0.0;
            for (int layer = 0; layer < nLayers; layer++)
            //for (int layer = 0; depthFromSurface < depthPAWC + soilPhysical.Thickness[layer]; layer++)
            {
                fracLayer = Math.Min(1.0, (depthPAWC - depthFromSurface) / soilPhysical.Thickness[layer]);
                TopSWC += waterBalance.SWmm[layer] * fracLayer;
                depthFromSurface += soilPhysical.Thickness[layer];
                if (depthFromSurface >= depthPAWC)
                    layer = nLayers;
            }
            
            TopSWdeficit = TopSWC - TopDUL;
            if (Math.Max(0.0, -TopSWdeficit) >= (TopDUL - TopLL) * (100 - triggerDeficit) / 100)
                SoilIsDry = true;
                
            //Are all the conditions ratifying irrigation
            if (IrrigationIsAllowed && SeasonIsOpen && CropIsActive && IrrigatorIsAvailable && SoilIsDry)
            {
                //Lets bloody well irrigate then!!!!
                AmountToApply = TopDUL * targetDeficit / 100 - TopSWC;
                AmountToApply = Math.Max(0.0, Math.Min(AmountToApply, seasonsAllocation - SeasonAppliedAmount));
                AmountToApply = Math.Min(AmountToApply,maximumAmount);
                Irrigation.Apply(AmountToApply);
                DaysSinceIrrigation = 0;
                SeasonAppliedAmount += AmountToApply;
            }
        }
        
        ///Checks whether theDate is between iniDate and endDate (non-year specific)
        private bool isBetween(DateTime theDay, DateTime iniDate, DateTime endDate)
        {
            bool result = false;
            if (iniDate.DayOfYear < endDate.DayOfYear)
            {
                // period is within one year, ex: summer in the northern hemisphere
                if ((theDay.DayOfYear >= iniDate.DayOfYear) && (theDay.DayOfYear <= endDate.DayOfYear))
                    result = true;
            }
            else
            {
                // period goes over the end of the year, ex: summer in the southern hemisphere
                if ((theDay.DayOfYear >= iniDate.DayOfYear) || (theDay.DayOfYear <= endDate.DayOfYear))
                    result = true;
            }
            
            return result;
        }
    }
}
```
              Manager TreeThinning: same as Validation.Australia Temperate.BFG.BF.BFG.Plantation.TreeThinning
              Operations Management
              Report: same as Validation.Australia Temperate.BFG.BF.BFG.Plantation.Report
              Plant Pinus: same as Validation.Australia Temperate.BFG.BF.BFG.Plantation.Pinus
      Folder TowerHill
        Experiment TowerHil
          Factors
            Factor l: Specification=[Management]
              Operations C
                1963-07-15  [TreeThinning].Script.DoThin(0.10);
                1964-07-15  [TreeThinning].Script.DoThin(0.10);
                1965-07-15  [TreeThinning].Script.DoThin(0.10);
                1966-07-15  [TreeThinning].Script.DoThin(0.10);
                1967-07-15  [TreeThinning].Script.DoThin(0.10);
                1968-07-15  [TreeThinning].Script.DoThin(0.10);
                1969-07-15  [TreeThinning].Script.DoThin(0.06);
                1970-07-15  [TreeThinning].Script.DoThin(0.06);
                1971-07-15  [TreeThinning].Script.DoThin(0.00);
                1972-07-15  [TreeThinning].Script.DoThin(0.01);
                1973-07-15  [TreeThinning].Script.DoThin(0.01);
              Operations N
                1963-07-15  [TreeThinning].Script.DoThin(0.10);
                1964-07-15  [TreeThinning].Script.DoThin(0.10);
                1965-07-15  [TreeThinning].Script.DoThin(0.10);
                1966-07-15  [TreeThinning].Script.DoThin(0.10);
                1967-07-15  [TreeThinning].Script.DoThin(0.10);
                1968-07-15  [TreeThinning].Script.DoThin(0.10);
                1969-07-15  [TreeThinning].Script.DoThin(0.06);
                1970-07-15  [TreeThinning].Script.DoThin(0.06);
                1971-07-15  [TreeThinning].Script.DoThin(0.00);
                1972-07-15  [TreeThinning].Script.DoThin(0.01);
                1973-07-15  [TreeThinning].Script.DoThin(0.01);
                1978-05-31  [Fertiliser].Apply(Amount: 116.6, Type: Fertiliser.Types.UreaN, 0);
                1979-05-31  [Fertiliser].Apply(Amount: 116.6, Type: Fertiliser.Types.UreaN, 0);
                1980-05-31  [Fertiliser].Apply(Amount: 116.6, Type: Fertiliser.Types.UreaN, 0);
                1981-05-31  [Fertiliser].Apply(Amount: 116.6, Type: Fertiliser.Types.UreaN, 0);
                1982-05-31  [Fertiliser].Apply(Amount: 116.6, Type: Fertiliser.Types.UreaN, 0);
                1983-05-31  [Fertiliser].Apply(Amount: 116.6, Type: Fertiliser.Types.UreaN, 0);
                1984-05-31  [Fertiliser].Apply(Amount: 116.6, Type: Fertiliser.Types.UreaN, 0);
                1985-05-31  [Fertiliser].Apply(Amount: 116.6, Type: Fertiliser.Types.UreaN, 0);
                1986-05-31  [Fertiliser].Apply(Amount: 116.6, Type: Fertiliser.Types.UreaN, 0);
                1987-05-31  [Fertiliser].Apply(Amount: 106, Type: Fertiliser.Types.NH4N, 0);
                1988-05-31  [Fertiliser].Apply(Amount: 106, Type: Fertiliser.Types.NH4N, 0);
                1989-05-31  [Fertiliser].Apply(Amount: 106, Type: Fertiliser.Types.NH4N, 0);
                1990-05-31  [Fertiliser].Apply(Amount: 106, Type: Fertiliser.Types.NH4N, 0);
          Simulation TowerHill
            Weather: FileName=TowerHill1900-2020SiloDataDrillModified.met
            Clock: Start=1962-05-01; End=1996-06-15
            Summary
            SoilArbitrator Soil Arbitrator
            Zone Plantation: Area=1; Slope=0; AspectAngle=0; Altitude=50
              Soil SynthSoilTowerHill: ASCOrder=NA; ASCSubOrder=NA; SoilType=Loam over Silty Clay Loam; Site=37835_41892; NearestTown=FINGAL; Region=Ben Lomond; State=Tasmania; NaturalVegetation=Unknown; ApsoilNumber=9999; Latitude=-41.53; Longitude=147.91; LocationAccuracy=+- 90m; YearOfSampling=2020; Comments=Landuse is Production forestry
                DataSource=Soil and Landscape Grid of Australia. This soil parameter file was automatically generated from the GSM National Surfaces using pedotransfer functions.
                Physical
                  Thickness  BD       AirDry     LL15      DUL       SAT       KS
                  150        1.10997  0.084849   0.254547  0.474717  0.508067  35.3737
                  150        1.22277  0.0709009  0.212703  0.375781  0.477495  20.3616
                  150        1.26144  0.0694074  0.208222  0.350485  0.470669  12.0751
                  150        1.27389  0.0668064  0.200419  0.32793   0.469876  8.98576
                  200        1.29472  0.0670742  0.201222  0.328165  0.464133  7.97185
                  200        1.31838  0.0682572  0.204772  0.335747  0.45634   7.75246
                  SoilCrop PinusSoil
                    LL=[0.267757, 0.222487, 0.216711, 0.207435, 0.207318, 0.210013]
                    KL=[0.06, 0.06, 0.0596733, 0.05502, 0.04802, 0.04002]
                    XF=[1, 1, 0, 0, 0, 0]
                WaterBalance SoilWater: SummerDate=1-nov; SummerU=6; SummerCona=6; WinterDate=1-apr; WinterU=2; WinterCona=2; DiffusConst=80.1935; DiffusSlope=29.01; Salb=0.13; CN2Bare=78; CNRed=20; CNCov=0; Slope=11.892; DischargeWidth=10; CatchmentArea=55119.6; Thickness=[150, 150, 150, 150, 200, 200]; SWCON=[0.648141, 0.413448, 0.31656, 0.250234, 0.197591, 0.20995]
                InitialWater Initial water: PercentMethod=0; FractionFull=1
                Organic: FOMCNRatio=40
                  Thickness  Carbon  SoilCNRatio  FBiom    FInert    FOM
                  150        5       14           0.02     0.2       475.475
                  150        4       14           0.02     0.3       303.176
                  150        0.01    14           0.01404  0.5       193.314
                  150        0.01    14           0.01     0.717535  123.262
                  200        0.01    14           0.01     0.977098  67.6477
                  200        0.01    14           0.01     0.859485  37.1259
                Chemical
                  Thickness  NO3N  NH4N  PH
                  150        0     0     5.29731
                  150        0     0     5.25219
                  150        0     0     5.28237
                  150        0     0     5.35428
                  200        0     0     5.46188
                  200        0     0     5.53903
                Sample Initial conditions: Depth=[0-180]; Thickness=[1800]; NH4=[1]; SWUnits=Volumetric; OCUnits=Total; PHUnits=Water
                CERESSoilTemperature
                Nutrient
              Irrigation
              Fertiliser
              SurfaceOrganicMatter: InitialResidueName=Pinus; InitialResidueType=Eucalyptus; InitialResidueMass=1000; InitialStandingFraction=0; InitialCPR=0; InitialCNR=40
              MicroClimate: a_interception=0; b_interception=1; c_interception=0; d_interception=0; soil_albedo=0.13; SoilHeatFluxFraction=0; MinimumHeightDiffForNewLayer=0; NightInterceptionFraction=0; ReferenceHeight=0
              Manager TreeSowingRule
                RowSpace = 2.4384
                RowWidth = 3
                CultivarName = radiata
                SowingDate = 06/16/1962 00:00:00
                script: same as in Validation.Australia Temperate.BFG.BF.BFG.Plantation.TreeSowingRule
              Manager TreeThinning: same as Validation.Australia Temperate.BFG.BF.BFG.Plantation.TreeThinning
              Operations Management
              Report: same as Validation.Australia Temperate.BFG.BF.BFG.Plantation.Report
              Plant Pinus: same as Validation.Australia Temperate.BFG.BF.BFG.Plantation.Pinus
      Folder SETRES
        Experiment SETRE
          Factors
            Factor S: Specification=[Management]
              Operations C (disabled)
                1992-02-15  [TreeThinning].Script.DoThin(0.302);
                1993-02-15  [TreeThinning].Script.DoThin(0.000);
                1994-02-15  [TreeThinning].Script.DoThin(0.001);
                1995-02-15  [TreeThinning].Script.DoThin(0.010);
                1996-02-15  [TreeThinning].Script.DoThin(0.000);
                1997-02-15  [TreeThinning].Script.DoThin(0.010);
                1998-02-15  [TreeThinning].Script.DoThin(0.000);
                1999-02-15  [TreeThinning].Script.DoThin(0.005);
                2000-02-15  [TreeThinning].Script.DoThin(0.004);
                2001-02-15  [TreeThinning].Script.DoThin(0.000);
              Operations F
                1992-02-15  [TreeThinning].Script.DoThin(0.281);
                1993-02-15  [TreeThinning].Script.DoThin(0.002);
                1994-02-15  [TreeThinning].Script.DoThin(0.000);
                1995-02-15  [TreeThinning].Script.DoThin(0.010);
                1996-02-15  [TreeThinning].Script.DoThin(0.000);
                1997-02-15  [TreeThinning].Script.DoThin(0.009);
                1998-02-15  [TreeThinning].Script.DoThin(0.005);
                1999-02-15  [TreeThinning].Script.DoThin(0.003);
                2000-02-15  [TreeThinning].Script.DoThin(0.007);
                2001-02-15  [TreeThinning].Script.DoThin(0.010);
                1992-05-31  [Fertiliser].Apply(Amount: 225, Type: Fertiliser.Types.UreaN, 0);
                1993-05-31  [Fertiliser].Apply(Amount: 82, Type: Fertiliser.Types.UreaN, 0);
                1994-05-31  [Fertiliser].Apply(Amount: 112, Type: Fertiliser.Types.UreaN, 0);
                1995-05-31  [Fertiliser].Apply(Amount: 56, Type: Fertiliser.Types.UreaN, 0);
                1996-05-31  [Fertiliser].Apply(Amount: 103.7, Type: Fertiliser.Types.UreaN, 0);
                1997-05-31  [Fertiliser].Apply(Amount: 103.7, Type: Fertiliser.Types.UreaN, 0);
                1998-05-31  [Fertiliser].Apply(Amount: 103.7, Type: Fertiliser.Types.UreaN, 0);
                1999-05-31  [Fertiliser].Apply(Amount: 103.7, Type: Fertiliser.Types.UreaN, 0);
                2000-05-31  [Fertiliser].Apply(Amount: 103.7, Type: Fertiliser.Types.UreaN, 0);
                2001-05-31  [Fertiliser].Apply(Amount: 103.7, Type: Fertiliser.Types.UreaN, 0);
                2002-05-31  [Fertiliser].Apply(Amount: 103.7, Type: Fertiliser.Types.UreaN, 0);
                2003-05-31  [Fertiliser].Apply(Amount: 103.7, Type: Fertiliser.Types.UreaN, 0);
                2004-05-31  [Fertiliser].Apply(Amount: 103.7, Type: Fertiliser.Types.UreaN, 0);
                2005-05-31  [Fertiliser].Apply(Amount: 103.7, Type: Fertiliser.Types.UreaN, 0);
                2006-05-31  [Fertiliser].Apply(Amount: 103.7, Type: Fertiliser.Types.UreaN, 0);
              Operations I (disabled)
                1992-02-15  [TreeThinning].Script.DoThin(0.287);
                1993-02-15  [TreeThinning].Script.DoThin(0.000);
                1994-02-15  [TreeThinning].Script.DoThin(0.000);
                1995-02-15  [TreeThinning].Script.DoThin(0.009);
                1996-02-15  [TreeThinning].Script.DoThin(0.002);
                1997-02-15  [TreeThinning].Script.DoThin(0.014);
                1998-02-15  [TreeThinning].Script.DoThin(0.002);
                1999-02-15  [TreeThinning].Script.DoThin(0.008);
                2000-02-15  [TreeThinning].Script.DoThin(0.005);
                2001-02-15  [TreeThinning].Script.DoThin(0.004);
                1978-05-31  [Fertiliser].Apply(Amount: 116.6, Type: Fertiliser.Types.UreaN, 0);
                1979-05-31  [Fertiliser].Apply(Amount: 116.6, Type: Fertiliser.Types.UreaN, 0);
                1980-05-31  [Fertiliser].Apply(Amount: 116.6, Type: Fertiliser.Types.UreaN, 0);
                1981-05-31  [Fertiliser].Apply(Amount: 116.6, Type: Fertiliser.Types.UreaN, 0);
                1982-05-31  [Fertiliser].Apply(Amount: 116.6, Type: Fertiliser.Types.UreaN, 0);
                1983-05-31  [Fertiliser].Apply(Amount: 116.6, Type: Fertiliser.Types.UreaN, 0);
                1984-05-31  [Fertiliser].Apply(Amount: 116.6, Type: Fertiliser.Types.UreaN, 0);
                1985-05-31  [Fertiliser].Apply(Amount: 116.6, Type: Fertiliser.Types.UreaN, 0);
                1986-05-31  [Fertiliser].Apply(Amount: 116.6, Type: Fertiliser.Types.UreaN, 0);
                1987-05-31  [Fertiliser].Apply(Amount: 106, Type: Fertiliser.Types.NH4N, 0);
                1988-05-31  [Fertiliser].Apply(Amount: 106, Type: Fertiliser.Types.NH4N, 0);
                1989-05-31  [Fertiliser].Apply(Amount: 106, Type: Fertiliser.Types.NH4N, 0);
                1990-05-31  [Fertiliser].Apply(Amount: 106, Type: Fertiliser.Types.NH4N, 0);
              Operations FI
                1992-02-15  [TreeThinning].Script.DoThin(0.308);
                1993-02-15  [TreeThinning].Script.DoThin(0.002);
                1994-02-15  [TreeThinning].Script.DoThin(0.003);
                1995-02-15  [TreeThinning].Script.DoThin(0.010);
                1996-02-15  [TreeThinning].Script.DoThin(0.004);
                1997-02-15  [TreeThinning].Script.DoThin(0.010);
                1998-02-15  [TreeThinning].Script.DoThin(0.000);
                1999-02-15  [TreeThinning].Script.DoThin(0.010);
                2000-02-15  [TreeThinning].Script.DoThin(0.000);
                2001-02-15  [TreeThinning].Script.DoThin(0.003);
                1992-05-31  [Fertiliser].Apply(Amount: 225, Type: Fertiliser.Types.UreaN, 0);
                1993-05-31  [Fertiliser].Apply(Amount: 82, Type: Fertiliser.Types.UreaN, 0);
                1994-05-31  [Fertiliser].Apply(Amount: 112, Type: Fertiliser.Types.UreaN, 0);
                1995-05-31  [Fertiliser].Apply(Amount: 56, Type: Fertiliser.Types.UreaN, 0);
                1996-05-31  [Fertiliser].Apply(Amount: 103.7, Type: Fertiliser.Types.UreaN, 0);
                1997-05-31  [Fertiliser].Apply(Amount: 103.7, Type: Fertiliser.Types.UreaN, 0);
                1998-05-31  [Fertiliser].Apply(Amount: 103.7, Type: Fertiliser.Types.UreaN, 0);
                1999-05-31  [Fertiliser].Apply(Amount: 103.7, Type: Fertiliser.Types.UreaN, 0);
                2000-05-31  [Fertiliser].Apply(Amount: 103.7, Type: Fertiliser.Types.UreaN, 0);
                2001-05-31  [Fertiliser].Apply(Amount: 103.7, Type: Fertiliser.Types.UreaN, 0);
                2002-05-31  [Fertiliser].Apply(Amount: 103.7, Type: Fertiliser.Types.UreaN, 0);
                2003-05-31  [Fertiliser].Apply(Amount: 103.7, Type: Fertiliser.Types.UreaN, 0);
                2004-05-31  [Fertiliser].Apply(Amount: 103.7, Type: Fertiliser.Types.UreaN, 0);
                2005-05-31  [Fertiliser].Apply(Amount: 103.7, Type: Fertiliser.Types.UreaN, 0);
                2006-05-31  [Fertiliser].Apply(Amount: 103.7, Type: Fertiliser.Types.UreaN, 0);
                1983-08-15  [AutomaticIrrigation].Script.TurnOn()
          Simulation SETRES
            Weather: FileName=SETRES1981-2020.met
            Clock: Start=1985-01-01; End=2001-02-15
            Summary
            SoilArbitrator Soil Arbitrator
            Zone Plantation: Area=1; Slope=0; AspectAngle=0; Altitude=50
              Soil SynthSoilSETRES: ASCOrder=NA; ASCSubOrder=NA; SoilType=Haplic Acrisols; Site=NA; NearestTown=NA; Region=NA; State=NA; Country=United States of America; NaturalVegetation=NA; ApsoilNumber=9999; Latitude=34.625; Longitude=-79.375; LocationAccuracy=+- 250 m; YearOfSampling=2019; DataSource=ISRIC SoilGrids
                Physical
                  Thickness  ParticleSizeClay  ParticleSizeSand  ParticleSizeSilt  BD     AirDry  LL15   DUL    SAT    KS
                  150        11.8              62.7              26                1.372  0.054   0.163  0.271  0.423  89.015
                  150        17.5              58.5              24.5              1.55   0.055   0.165  0.253  0.37   46.13
                  150        22.8              54.8              22.5              1.596  0.06    0.18   0.257  0.36   25.09
                  150        24.2              54.2              21.5              1.599  0.06    0.18   0.256  0.36   21.083
                  200        25                54.5              20.8              1.609  0.06    0.18   0.253  0.358  19.326
                  200        25                55.5              20.2              1.626  0.06    0.18   0.249  0.353  19.326
                  200        24.8              56.4              19.6              1.633  0.06    0.179  0.246  0.35   19.78
                  200        24.4              57.2              18.8              1.632  0.059   0.177  0.244  0.35   20.719
                  300        23.9              58.2              17.8              1.63   0.058   0.175  0.241  0.35   21.957
                  300        23.3              59.4              16.6              1.628  0.057   0.172  0.238  0.35   23.539
                  SoilCrop PinusSoil
                    LL=[0.163, 0.165, 0.181, 0.189, 0.199, 0.21, 0.221, 0.231, 0.24, 0.238]
                    KL=[0.06, 0.06, 0.059, 0.053, 0.044, 0.034, 0.023, 0.012, 0.001, 0]
                    XF=[1, 0.97, 0.831, 0.814, 0.786, 0.744, 0.727, 0.732, 0.739, 0]
                InitialWater Initial water: PercentMethod=0; FractionFull=1
                WaterBalance SoilWater: SummerDate=1-may; SummerU=6; SummerCona=6; WinterDate=1-oct; WinterU=2; WinterCona=2; DiffusConst=1377.5; DiffusSlope=21.17; Salb=0.13; CN2Bare=73; CNRed=20; CNCov=0; Slope=0.5; DischargeWidth=5; CatchmentArea=10; Thickness=[150, 150, 150, 150, 200, 200, 200, 200, 300, 300]
                  SWCON=[0.535, 0.501, 0.445, 0.421, 0.36, 0.361, 0.364, 0.367, 0.305, 0.31]
                Organic: FOMCNRatio=40
                  Thickness  Carbon  SoilCNRatio  FBiom  FInert  FOM
                  150        2.078   9.5          0.04   0.197   60.644
                  150        0.861   9.5          0.031  0.42    48.4252
                  150        0.53    9.5          0.014  0.663   38.6683
                  150        0.422   9.5          0.01   0.83    30.8773
                  200        0.331   9.5          0.01   0.99    22.8745
                  200        0.257   9.5          0.01   0.99    16.9458
                  200        0.217   9.5          0.01   0.99    12.5538
                  200        0.21    9.5          0.01   0.99    9.30006
                  300        0.201   9.5          0.01   0.99    5.92998
                  300        0.19    9.5          0.01   0.99    3.78112
                Chemical
                  Thickness  NO3N  NH4N  PH
                  150        0     0     5.2
                  150        0     0     5.15
                  150        0     0     5.12
                  150        0     0     5.18
                  200        0     0     5.18
                  200        0     0     5.12
                  200        0     0     5.1
                  200        0     0     5.1
                  300        0     0     5.1
                  300        0     0     5.1
                Sample Initial conditions: Depth=[0-180]; Thickness=[1800]; NH4=[1]; SWUnits=Volumetric; OCUnits=Total; PHUnits=Water
                CERESSoilTemperature
                Nutrient
              SurfaceOrganicMatter: InitialResidueName=Pinus; InitialResidueType=Eucalyptus; InitialResidueMass=1000; InitialStandingFraction=0; InitialCPR=0; InitialCNR=40
              Irrigation
              Fertiliser
              MicroClimate: a_interception=0; b_interception=1; c_interception=0; d_interception=0; soil_albedo=0.13; SoilHeatFluxFraction=0; MinimumHeightDiffForNewLayer=0; NightInterceptionFraction=0; ReferenceHeight=0
              Plant Pinus: same as Validation.Australia Temperate.BFG.BF.BFG.Plantation.Pinus
              Manager TreeSowingRule
                RowSpace = 2
                RowWidth = 3
                CultivarName = taeda
                SowingDate = 02/15/1985 00:00:00
                script: same as in Validation.Australia Temperate.BFG.BF.BFG.Plantation.TreeSowingRule
              Manager TreeThinning: same as Validation.Australia Temperate.BFG.BF.BFG.Plantation.TreeThinning
              Operations Management
              Report: same as Validation.Australia Temperate.BFG.BF.BFG.Plantation.Report
              Manager AutomaticIrrigation
                allowIrrigation = False
                seasonStart = 1-sep
                seasonEnd = 30-mar
                seasonsAllocation = 10000
                triggerDeficit = 20
                targetDeficit = 40
                returndays = 6
                maximumAmount = 25
                depthPAWC = 500
                TopSWdeficit = 0
                TopSWC = 0
                DaysSinceIrrigation = 0
                AmountToApply = 0
                SeasonAppliedAmount = 0
                script: same as in Validation.Australia Temperate.BFG.BF.BFG.Plantation.AutomaticIrrigation
      Folder IMPAC
        Experiment IMPAC
          Factors
            Factor L: Specification=[Management]
              Operations F1H0
                1992-02-15  [TreeThinning].Script.DoThin(0.281);
                1993-02-15  [TreeThinning].Script.DoThin(0.002);
                1994-02-15  [TreeThinning].Script.DoThin(0.000);
                1995-02-15  [TreeThinning].Script.DoThin(0.010);
                1996-02-15  [TreeThinning].Script.DoThin(0.000);
                1997-02-15  [TreeThinning].Script.DoThin(0.009);
                1998-02-15  [TreeThinning].Script.DoThin(0.005);
                1999-02-15  [TreeThinning].Script.DoThin(0.003);
                2000-02-15  [TreeThinning].Script.DoThin(0.007);
                2001-02-15  [TreeThinning].Script.DoThin(0.010);
                1992-05-31  [Fertiliser].Apply(Amount: 225, Type: Fertiliser.Types.UreaN, 0);
                1993-05-31  [Fertiliser].Apply(Amount: 82, Type: Fertiliser.Types.UreaN, 0);
                1994-05-31  [Fertiliser].Apply(Amount: 112, Type: Fertiliser.Types.UreaN, 0);
                1995-05-31  [Fertiliser].Apply(Amount: 56, Type: Fertiliser.Types.UreaN, 0);
                1996-05-31  [Fertiliser].Apply(Amount: 103.7, Type: Fertiliser.Types.UreaN, 0);
                1997-05-31  [Fertiliser].Apply(Amount: 103.7, Type: Fertiliser.Types.UreaN, 0);
                1998-05-31  [Fertiliser].Apply(Amount: 103.7, Type: Fertiliser.Types.UreaN, 0);
                1999-05-31  [Fertiliser].Apply(Amount: 103.7, Type: Fertiliser.Types.UreaN, 0);
                2000-05-31  [Fertiliser].Apply(Amount: 103.7, Type: Fertiliser.Types.UreaN, 0);
                2001-05-31  [Fertiliser].Apply(Amount: 103.7, Type: Fertiliser.Types.UreaN, 0);
              Operations F1H1: same as Validation.Australia Temperate.IMPAC.IMPAC.Factors.L.F1H0
            Factor S: same as Validation.Australia Temperate.IMPAC.IMPAC.Factors.L
          Simulation IMPAC
            Weather: FileName=IMPAC1981-2020.met
            Clock: Start=1982-12-15; End=2002-02-15
            Summary
            SoilArbitrator Soil Arbitrator
            Zone Plantation: Area=1; Slope=0; AspectAngle=0; Altitude=50
              SurfaceOrganicMatter: InitialResidueName=Pinus; InitialResidueType=Eucalyptus; InitialResidueMass=1000; InitialStandingFraction=0; InitialCPR=0; InitialCNR=40
              Soil SynthSoilIMPAC: ASCOrder=NA; ASCSubOrder=NA; SoilType=Haplic Acrisols; Site=NA; NearestTown=NA; Region=NA; State=NA; Country=United States of America; NaturalVegetation=NA; ApsoilNumber=9999; Latitude=29.875; Longitude=-82.375; LocationAccuracy=+- 250 m; YearOfSampling=2019; DataSource=ISRIC SoilGrids
                Physical
                  Thickness  ParticleSizeClay  ParticleSizeSand  ParticleSizeSilt  BD     AirDry  LL15   DUL    SAT    KS
                  150        5                 83.7              12                1.161  0.033   0.098  0.182  0.485  196.659
                  150        6.5               81.5              12                1.306  0.032   0.095  0.172  0.44   165.252
                  150        8.8               79.5              11.8              1.385  0.034   0.103  0.177  0.417  127.29
                  150        10.2              78.5              11.2              1.409  0.036   0.107  0.178  0.413  106.962
                  200        11.8              77.2              11                1.437  0.038   0.115  0.184  0.405  89.879
                  200        13.2              75.8              11                1.467  0.042   0.125  0.193  0.395  75.525
                  200        14.5              74.6              10.9              1.482  0.044   0.131  0.199  0.39   65.331
                  200        15.5              73.8              10.7              1.483  0.044   0.133  0.201  0.39   58.176
                  300        16.8              72.8              10.5              1.484  0.045   0.136  0.204  0.39   50.323
                  300        18.2              71.6              10.2              1.485  0.046   0.139  0.207  0.39   42.287
                  SoilCrop PinusSoil
                    LL=[0.098, 0.095, 0.103, 0.107, 0.115, 0.125, 0.131, 0.133, 0.136, 0.139]
                    KL=[0.06, 0.06, 0.059, 0.053, 0.044, 0.034, 0.023, 0.012, 0.001, 0]
                    XF=[1, 0.97, 0.831, 0.814, 0.786, 0.744, 0.727, 0.732, 0.739, 0]
                WaterBalance SoilWater: SummerDate=1-may; SummerU=6; SummerCona=6; WinterDate=1-oct; WinterU=4; WinterCona=2.5; DiffusConst=10743.42; DiffusSlope=0.56; Salb=0.16; CN2Bare=68; CNRed=20; CNCov=0; Slope=0.5; DischargeWidth=5; CatchmentArea=10; Thickness=[150, 150, 150, 150, 200, 200, 200, 200, 300, 300]
                  SWCON=[0.569, 0.565, 0.546, 0.529, 0.468, 0.455, 0.442, 0.429, 0.345, 0.324]
                InitialWater Initial water: PercentMethod=0; FractionFull=1
                Organic: FOMCNRatio=40
                  Thickness  Carbon  SoilCNRatio  FBiom  FInert  FOM
                  150        4.86    10.4         0.04   0.394   84.9016
                  150        2.891   10.4         0.031  0.589   67.7953
                  150        1.88    10.4         0.014  0.854   54.1356
                  150        1.722   10.4         0.01   0.916   43.2282
                  200        1.581   10.4         0.01   0.978   32.0242
                  200        1.457   10.4         0.01   0.99    23.7241
                  200        1.392   10.4         0.01   0.99    17.5753
                  200        1.381   10.4         0.01   0.99    13.0201
                  300        1.369   10.4         0.01   0.99    8.30197
                  300        1.354   10.4         0.01   0.99    5.29357
                Chemical
                  Thickness  NO3N  NH4N  PH
                  150        0     0     5.08
                  150        0     0     5.2
                  150        0     0     5.3
                  150        0     0     5.3
                  200        0     0     5.3
                  200        0     0     5.3
                  200        0     0     5.29
                  200        0     0     5.27
                  300        0     0     5.25
                  300        0     0     5.21
                Sample Initial conditions: Depth=[0-180]; Thickness=[1800]; NH4=[1]; SWUnits=Volumetric; OCUnits=Total; PHUnits=Water
                CERESSoilTemperature
                Nutrient
              Irrigation
              Fertiliser
              MicroClimate: a_interception=0; b_interception=1; c_interception=0; d_interception=0; soil_albedo=0.13; SoilHeatFluxFraction=0; MinimumHeightDiffForNewLayer=0; NightInterceptionFraction=0; ReferenceHeight=0
              Plant Pinus: same as Validation.Australia Temperate.BFG.BF.BFG.Plantation.Pinus
              Manager TreeSowingRule
                RowSpace = 2
                RowWidth = 3
                CultivarName = taeda
                SowingDate = 01/15/1983 00:00:00
                script: same as in Validation.Australia Temperate.BFG.BF.BFG.Plantation.TreeSowingRule
              Manager TreeThinning: same as Validation.Australia Temperate.BFG.BF.BFG.Plantation.TreeThinning
              Operations Management
              Report: same as Validation.Australia Temperate.BFG.BF.BFG.Plantation.Report
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