Simulations: Version=6
  Memo TitlePage
    # The APSIM Forage Plantain Model
  Replacements
    Plant Plantain: CropType=Plantain
      Memo TitlePage
        # Forage Plantain

        _Rogerio Cichota and Brittany Patton, AgResearch, New Zealand_

        This model has been built using the Plant Modelling Framework (PMF) of [brown_plant_2014] to simulate the growth of a forage plantain crop ( _Plantago lanceolata_ ).  The model focus, thus, on describing primarily the vegetative growth, with a simplified account of the reproductive phase, without explicit considering flowers and seeds (these may be included in future releases).  To simulate the aboveground plant structure, including the photosynthesis process, the plantain model uses the SimpleLeaf procedure of PMF.  The model describes a semi-perennial crop, with phenology rewinding to the vegetative stage at the end of the reproductive phase.

        ##Inclusion in APSIM simulations
        A forage plantain crop can be included in a simulation the same as any other APSIM crop.

         - The plantain object can be dragged or copied from the Crop folder in the tool box into a Field in your simulation;
         - To become active and grow, plantain needs to be sown using a manager script with a sowing rule. e.g.:
        <pre><code class='language-cs'>
         Plantain.Sow(cultivar: Lancelot, population: 200, depth: 10, rowSpacing: 150);
        </code></pre>
        If a specified cultivar is not available, a fatal error will be thrown.

        ##Harvest and biomass removal
        Plantain biomass can be removed by raising one of the valid methods: Harvest, Cut, Graze, or Prune; this is done using a manager script, similarly to other crops.  The proportion of the biomass of each organ that is removed from the system and/or added to the residue pools may be specified; otherwise defaults will be used.  Note that the sum of fractions removed and added to residue should be <= 1.0.  To specify the proportions for removal in a manager script, use a RemovalFractions class as shown below:
        <pre><code class='language-cs'>
        [EventSubscribe("Commencing")]
        private void OnSimulationCommencing(object sender, EventArgs e)
        {
          RemoveFraction = new RemovalFractions(Plantain.Organs);
        }
        [EventSubscribe("DoManagement")]
        private void OnDoManagement(object sender, EventArgs e)
        {
          if (Clock.Today.Date == HarvestDate)
          {
            RemoveFraction.SetFractionToRemove("Leaf", 0.80);
            RemoveFraction.SetFractionToRemove("Stem", 0.50);
            RemoveFraction.SetFractionToResidue("leaf",0.05);
            Plantain.Harvest(RemoveFraction);
          }
        }
         </code></pre>
        The RemovalFractions class can be sent with Harvest, Cut, Graze, or Prune events. All parameters are optional, defaults are used whenever any value is not specified.

        ##Crop termination
        To fully terminate a crop the EndCrop event should be raised:
        <pre><code class='language-cs'>
         Plantain.EndCrop();
        </code></pre>
        Once a crop has been ended the field is open to be used by another APSIM plant model, or another plantain crop.  Note that ending plantain is not necessary before sowing another crop, competition for resources will take place between crops when there is more than one in the field.
      Phenology: DaysAfterSowing=0
        Memo Description
          The duration of each phenologic phase in plantain is controlled either by the accumulation of thermal time or photoperiod.
        AirTemperatureFunction ThermalTime
          Memo Description
            The thermal time is calculated from the daily average temperature using three cardinal temperatures: minimum, maximum, and optimum.  Crop development acelerates as temperature increases from minimum to optimum and slows down after that, stopping completely when maximum temperature is reached.  There is very little information about these thresholds for plantain, the minimum temperature seem to be quite variable as one of the main traits that vary among cultivars is the growth over winter. For "chinese plantain" ( _Plantago  asiatica_ ) the minimum temperature varies between 3 and 14 oC (Ishikawa et al., 2007), which gives an idea of potential variations for this parameter in plantain. Plantain is tolerant to high temperatures (Stewardt, 1996; Nie et al., 2008) and outgrows ryegrass over summer in subtropical climate (Moorhead and Piggot, 2009). The data for chinese plantain suggest similar growth, and thus the optimum and maximum temperature for it, 30 and 38oC respectively (Ishikawa et al., 2007), should give a good indication of the values for forage plantain.
          XYPairs: X=[9, 30, 38]; Y=[0, 25, 0]
        PhotoperiodFunction Photoperiod: Twilight=-6; DayLength=0
        GerminatingPhase Germinating: Start=Sowing; End=Germination
          Memo Description
            Germination will occur one day after sowing, provided that the amount of soil extractable water is greater than zero.  Germination rates in plantain typically vary between 75 and 95% when sown close to the surface (<10mm), in moist warm soil (Reed et al, 2008; Douglas et al., 2013; Lee et al., 2015).  The plantain model, following convention of PMF, assumes 100% germination, and therefore the user must correct sowing rate when variations between sown and germinated plant density is considered important.
        EmergingPhase Emerging: Start=Germination; End=Emergence; ShootLag=15; ShootRate=10
          Memo Description
             Plantain has small seeds and emergence is best when seeds are sown at depth <10mm (Peri et al., 2000; Sanderson et al., 2000), deeper seed may stay dormant for years in the soil (Blom, 1978; Roberts and Boddrell, 1984).  Variations in germination rate due to depth are not explicitly simulated by the plantain model in the current version, however the sowing depth does affect timing of emergence.  This is controlled by the parameter ShootRate, which is the shoot elongation rate as function of thermal time (mm/oCd).
          VariableReference ThermalTime: VariableName=[Phenology].ThermalTime.Value()
        GenericPhase Vegetative: Start=Emergence; End=Flowering
          Memo Description
            During this phase the plant only partitions biomass to leaf and root+taproot organs.  The phase starts when plants emerge from the ground, but it is also triggered after the end of the reproductive phase (phenology reset).  It ends when the reproductive phase starts, which is triggered by the accumulation of days with long sunlight (Sussex, 1956; Rowarth, 1990; Case et al., 1995; Lacey et al., 2003; Gonzalez-Parado et al., 2015).  Stalk development have been recorded to start in October in NZ and in May in the USA (Rowarth, 1990; Lacey et al., 2003), with data suggesting a minimum of 25-30 days (non consecutive) with long daylight periods (Sussex, 1956; Fajer et al., 1991; Case et al., 1995).  The literature does not provide an indication of how long the sunlight period should be to trigger the reproductive phase, but it is clear that daylight should be grater that the period in darkness (14-16 hours been used in growth chambers).
          Constant Target: FixedValue=30; Units=days
          LinearInterpolationFunction ThermalTime: XProperty=[Phenology].Photoperiod.Value()
            XYPairs: X=[10, 12.5, 14, 15]; Y=[0, 0, 1, 1]
        GenericPhase Reproductive: Start=Flowering; End=Ripening
          Memo Description
            During this phase the plant is partitioning biomass to all organs, including reproductive organs (stems, flowers, and seeds). Flower stages and seeds development are not explicitly described in the current model, only a generic organ refered to as _inflorescence_ is defined.  This was done partly due to lack of data and partly because of the variability and complex phenology of plantain.  There is a lot of variation among plantain plants regarding when flowering occurs and how long it lasts, plus even the same plant can have flowering stalks, stalks with young seeds, as well as stalks with ripen seed at the same time (Rowarth, 1990; Rumball et al., 1997; Lacey et al., 2003; Gonzalez-Parado et al., 2015).  Seed ripenning is reached some 8-10 weeks after flowering, with commercial cultivars closer to the low end of the range. Available data suggest an accumulation of 450oCd for the flowering period, with base temperature between 5 and 9oC (Rowarth, 1990; Rumball et al., 1997, Gonzalez-Parado et al., 2015). Howerver flowering continues throughout the summer into autumn and seem to be curtailed only by frosts (Rowarth, 1990).  The plantain model uses photoperiod to trigger the start of reproductive phase, so this approach is used to also end this phase (thus ensuring phenology reset even in warmer climates).
          Constant Target: FixedValue=30; Units=days
          LinearInterpolationFunction ThermalTime: XProperty=[Phenology].Photoperiod.Value()
            XYPairs: X=[8, 10.5, 12, 15]; Y=[1, 1, 0, 0]
        GotoPhase: Start=Ripening; End=Ripening; FractionComplete=0; PhaseNameToGoto=Vegetative
          Memo Description
            At the end of reproductive phase, plantain phenology is reset to 'Vegetative'.
      OrganArbitrator Arbitrator
        RelativeAllocation NArbitrator
        RelativeAllocation DMArbitrator
      SimpleLeaf Leaf: CohortsInitialised=false; Albedo=0.18; Gsmax=0.015; R50=150; MicroClimatePresent=true
        zero: TipsAtEmergence, CohortsAtInitialisation, InitialisedCohortNo, AppearedCohortNo, PlantAppearedLeafNo, LAI, Height, FRGR, PotentialEP, KDead, LAIDead
        Memo Description
          Represents all leaves in the plant.
        MultiplyFunction InitialWtFunction
          Constant InitialPlantWt: FixedValue=0.005; Units=g/plant
          VariableReference Population: VariableName=[Plant].Population
        Constant StructuralFraction: FixedValue=1; Units=g/g
        Constant MinimumNConc: FixedValue=0.015; Units=gN/gDM
        Constant MaximumNConc: FixedValue=0.055; Units=gN/gDM
        RUEModel Photosynthesis
          Constant RUE: FixedValue=2; Units=g/MJ
          RUECO2Function FCO2: PhotosyntheticPathway=C3
          LinearInterpolationFunction FN: XProperty=[Leaf].Fn
            XYPairs: X=[0, 0.4, 0.8, 1.5]; Y=[0, 0.5, 1, 1]
          WeightedTemperatureFunction FT: MaximumTemperatureWeighting=0.75
            XYPairs: X=[5, 10, 15, 21, 26, 35]; Y=[0, 0.1, 0.4, 1, 1, 0]
          LinearInterpolationFunction FW: XProperty=[Leaf].Fw
            XYPairs: X=[0, 0.8, 1, 1.5]; Y=[0, 1, 1, 1]
          LinearInterpolationFunction FVPD: XProperty=[Leaf].Photosynthesis.VPD
            XYPairs: X=[0, 10, 50]; Y=[1, 1, 1]
          VariableReference RadnInt: VariableName=[Leaf].RadIntTot
        DivideFunction FRGRFunction
          VariableReference Photosynthesis: VariableName=[Leaf].Photosynthesis.Value()
          MultiplyFunction PotentialPhotosynthesis
            VariableReference RUE: VariableName=[Leaf].Photosynthesis.RUE.Value()
            MaximumFunction Radiation
              VariableReference RadnInt: VariableName=[Leaf].RadIntTot
              Constant MinRadn: FixedValue=1E-05
        PartitionFractionDemandFunction DMDemandFunction
          Memo Description
            DM demand function attempts to keep the shoot to root ratio and then the leaf to stem ratio close to a target value, which varies according to the development phase.  This is necessary to ensure that the plantain plants will recovery after grazing by growing leaves even during reproductive phase.
          PhaseLookup PartitionFraction
            PhaseLookupValue Vegetative: Start=Emergence; End=Flowering
              DivideFunction LeafFraction
                MultiplyFunction Numerator
                  VariableReference TargetSR1: VariableName=[TargetShootRootRatio].Value()
                  VariableReference TargetSR2: VariableName=[TargetShootRootRatio].Value()
                AddFunction Denominator
                  MultiplyFunction TargetSRs
                    VariableReference TargetSR1: VariableName=[TargetShootRootRatio].Value()
                    VariableReference TargetSR2: VariableName=[TargetShootRootRatio].Value()
                  VariableReference CurrentSR: VariableName=[ShootRootRatio].Value()
            PhaseLookupValue Reproductive: Start=Flowering; End=Ripening
              DivideFunction LeafFraction
                MultiplyFunction Numerator
                  VariableReference TargetSR1: VariableName=[TargetShootRootRatio].Value()
                  VariableReference TargetSR2: VariableName=[TargetShootRootRatio].Value()
                  VariableReference CurrentSL: VariableName=[StemsLeafRatio].Value()
                MultiplyFunction Denominator
                  AddFunction SRs: same as Replacements.Plantain.Leaf.DMDemandFunction.PartitionFraction.Vegetative.LeafFraction.Denominator
                  AddFunction SLs
                    MultiplyFunction TargetSLs
                      VariableReference TargetSL1: VariableName=[TargetStemsLeafRatio].Value()
                      VariableReference TargetSL2: VariableName=[TargetStemsLeafRatio].Value()
                    VariableReference CurrentSL: VariableName=[StemsLeafRatio].Value()
        Constant DMConversionEfficiency: FixedValue=1; Units=0-1
        Constant MaintenanceRespirationFunction: FixedValue=0; Units=0-1
        MultiplyFunction LAIFunction
          Constant SpecificLeafArea: FixedValue=0.022; Units=m^2/g
          VariableReference LiveLeafWeight: VariableName=[Leaf].Live.Wt
        MultiplyFunction LaiDeadFunction
          VariableReference SpecificLeafArea: VariableName=[Leaf].LAIFunction.SpecificLeafArea.Value()
          VariableReference DeadLeafWeight: VariableName=[Leaf].Dead.Wt
        Constant ExtinctionCoefficientFunction: FixedValue=0.6; Units=0-1
        LinearInterpolationFunction HeightFunction: XProperty=[Plantain].AboveGround.Wt
          XYPairs: X=[10, 100, 500]; Y=[100, 350, 600]
        MultiplyFunction SenescenceRate
          Constant ReferenceRate: FixedValue=0.005; Units=/day
          LinearInterpolationFunction StageFactor: XProperty=[Phenology].Stage
            XYPairs: X=[3, 4, 5]; Y=[0.5, 1, 1]
          LinearInterpolationFunction CoverFactor: XProperty=[Leaf].CoverTotal
            XYPairs: X=[0, 0.5, 0.9, 0.95, 0.99, 1]; Y=[1, 1, 1, 1.1, 2, 3]
          WeightedTemperatureFunction TemperatureFactor: MaximumTemperatureWeighting=0.5
            XYPairs: X=[-15, -2, 2, 10, 20, 30]; Y=[1.5, 0.25, 0, 0, 1, 1]
          LinearInterpolationFunction SoilMoistureFactor: XProperty=[Leaf].Fw
            XYPairs: X=[0, 0.5, 1]; Y=[2, 1, 1]
        MultiplyFunction DetachmentRateFunction
          Constant ReferenceRate: FixedValue=0.1; Units=/day
          LinearInterpolationFunction SoilMoistureFactor: XProperty=[Leaf].Fw
            XYPairs: X=[0, 0.5, 1]; Y=[0.5, 0.5, 1]
        Constant DMRetranslocationFactor: FixedValue=0; Units=/day
        Constant NRetranslocationFactor: FixedValue=0; Units=/day
        Constant NReallocationFactor: FixedValue=1; Units=/day
        Biomass Live
        Biomass Dead
        BiomassRemoval BiomassRemovalDefaults
          OrganBiomassRemovalType Cut: FractionLiveToRemove=0; FractionDeadToRemove=0; FractionLiveToResidue=0; FractionDeadToResidue=0
          OrganBiomassRemovalType Graze: FractionLiveToRemove=0; FractionDeadToRemove=0; FractionLiveToResidue=0; FractionDeadToResidue=0
          OrganBiomassRemovalType Harvest: FractionLiveToRemove=0; FractionDeadToRemove=0; FractionLiveToResidue=0; FractionDeadToResidue=0
          OrganBiomassRemovalType Prune: FractionLiveToRemove=0; FractionDeadToRemove=0; FractionLiveToResidue=0; FractionDeadToResidue=0
      GenericOrgan Stem
        Memo Description
          Represents all the stems in the plant.
        MultiplyFunction InitialWtFunction
          Constant InitialPlantWt: FixedValue=1E-06; Units=g/plant
          VariableReference Population: VariableName=[Plant].Population
        Constant StructuralFraction: FixedValue=1; Units=g/g
        Constant MinimumNConc: FixedValue=0.01; Units=gN/gDM
        Constant MaximumNConc: FixedValue=0.025; Units=gN/gDM
        PartitionFractionDemandFunction DMDemandFunction
          PhaseLookup PartitionFraction
            PhaseLookupValue Reproductive: Start=Flowering; End=Ripening
              DivideFunction StemFraction
                MultiplyFunction Numerator
                  VariableReference TargetSR1: VariableName=[TargetShootRootRatio].Value()
                  VariableReference TargetSR2: VariableName=[TargetShootRootRatio].Value()
                  VariableReference TargetSL1: VariableName=[TargetStemsLeafRatio].Value()
                  VariableReference TargetSL2: VariableName=[TargetStemsLeafRatio].Value()
                  VariableReference CurrentFS: VariableName=[FlowerStemRatio].Value()
                MultiplyFunction Denominator
                  AddFunction SRs: same as Replacements.Plantain.Leaf.DMDemandFunction.PartitionFraction.Vegetative.LeafFraction.Denominator
                  AddFunction SLs: same as Replacements.Plantain.Leaf.DMDemandFunction.PartitionFraction.Reproductive.LeafFraction.Denominator.SLs
                  AddFunction FSs
                    MultiplyFunction TargetFSs
                      VariableReference TargetFS1: VariableName=[TargetFlowerStemRatio].Value()
                      VariableReference TargetFS2: VariableName=[TargetFlowerStemRatio].Value()
                    VariableReference CurrentFS: VariableName=[FlowerStemRatio].Value()
        Constant DMConversionEfficiency: FixedValue=1; Units=0-1
        Constant MaintenanceRespirationFunction: FixedValue=0; Units=0-1
        MultiplyFunction SenescenceRate
          Constant ReferenceRate: FixedValue=0.2; Units=/day
          LinearInterpolationFunction StageFactor: XProperty=[Phenology].Stage
            XYPairs: X=[3, 3.999, 4, 4.5, 4.75, 5]; Y=[1, 1, 0.5, 0.55, 0.75, 1]
          WeightedTemperatureFunction TemperatureFactor: MaximumTemperatureWeighting=0.5
            XYPairs: X=[-15, 0, 2, 10, 20, 30]; Y=[2, 0.2, 0, 0, 1, 1]
          LinearInterpolationFunction SoilMoistureFactor: XProperty=[Leaf].Fw
            XYPairs: X=[0, 0.5, 1]; Y=[2, 1, 1]
        MultiplyFunction DetachmentRateFunction
          Constant ReferenceRate: FixedValue=0.1; Units=/day
          LinearInterpolationFunction SoilMoistureFactor: XProperty=[Leaf].Fw
            XYPairs: X=[0, 0.5, 0.75, 1]; Y=[0.1, 0.1, 0.25, 1]
        Constant DMRetranslocationFactor: FixedValue=0; Units=/day
        Constant NRetranslocationFactor: FixedValue=0; Units=/day
        Constant NReallocationFactor: FixedValue=1; Units=/day
        Biomass Live
        Biomass Dead
        BiomassRemoval BiomassRemovalDefaults: same as Replacements.Plantain.Leaf.BiomassRemovalDefaults
      GenericOrgan Inflorescence
        Memo Description
          Represents the reproductive parts of the plant, flowers, pods, seed, etc.
        Constant InitialWtFunction: FixedValue=0; Units=g/m^2
        Constant StructuralFraction: FixedValue=1; Units=g/g
        Constant MinimumNConc: FixedValue=0.02; Units=gN/gDM
        Constant MaximumNConc: FixedValue=0.07; Units=gN/gDM
        PartitionFractionDemandFunction DMDemandFunction
          PhaseLookup PartitionFraction
            PhaseLookupValue Reproductive: Start=Flowering; End=Ripening
              DivideFunction FlowerFraction
                MultiplyFunction Numerator
                  VariableReference TargetSR1: VariableName=[TargetShootRootRatio].Value()
                  VariableReference TargetSR2: VariableName=[TargetShootRootRatio].Value()
                  VariableReference TargetSL1: VariableName=[TargetStemsLeafRatio].Value()
                  VariableReference TargetSL2: VariableName=[TargetStemsLeafRatio].Value()
                  VariableReference TargetFS1: VariableName=[TargetFlowerStemRatio].Value()
                  VariableReference TargetFS2: VariableName=[TargetFlowerStemRatio].Value()
                MultiplyFunction Denominator: same as Replacements.Plantain.Stem.DMDemandFunction.PartitionFraction.Reproductive.StemFraction.Denominator
        Constant DMConversionEfficiency: FixedValue=1; Units=0-1
        Constant MaintenanceRespirationFunction: FixedValue=0; Units=0-1
        MultiplyFunction SenescenceRate
          Constant ReferenceRate: FixedValue=0.25; Units=/day
          LinearInterpolationFunction StageFactor: XProperty=[Phenology].Stage
            XYPairs: X=[3, 3.99, 4, 4.5, 5]; Y=[1, 1, 0.5, 0.65, 1]
          WeightedTemperatureFunction TemperatureFactor: MaximumTemperatureWeighting=0.5
            XYPairs: X=[0, 5, 20, 30]; Y=[0, 0, 1, 1]
          LinearInterpolationFunction SoilMoistureFactor: XProperty=[Leaf].Fw
            XYPairs: X=[0, 0.5, 1]; Y=[2, 1, 1]
        MultiplyFunction DetachmentRateFunction
          Constant ReferenceRate: FixedValue=0.25; Units=/day
          LinearInterpolationFunction SoilMoistureFactor: XProperty=[Leaf].Fw
            XYPairs: X=[0, 0.5, 1]; Y=[0, 0.5, 1]
        Constant DMRetranslocationFactor: FixedValue=0; Units=/day
        Constant NRetranslocationFactor: FixedValue=0; Units=/day
        Constant NReallocationFactor: FixedValue=1; Units=/day
        Biomass Live
        Biomass Dead
        BiomassRemoval BiomassRemovalDefaults: same as Replacements.Plantain.Leaf.BiomassRemovalDefaults
      GenericOrgan Taproot
        Memo Description
          This represents all the taproots of the plant (described as a storage organ)
        Constant InitialWtFunction: FixedValue=0; Units=g/m^2
        Constant StructuralFraction: FixedValue=1; Units=g/g
        Constant MinimumNConc: FixedValue=0.007; Units=gN/gDM
        Constant MaximumNConc: FixedValue=0.02; Units=gN/gDM
        PartitionFractionDemandFunction DMDemandFunction
          PhaseLookup PartitionFraction
            PhaseLookupValue AllPhases: Start=Emergence; End=Ripening
              DivideFunction TaprootFraction
                MultiplyFunction Numerator
                  VariableReference CurrentSR: VariableName=[ShootRootRatio].Value()
                  VariableReference TargetTR1: VariableName=[TargetTaprootRootRatio].Value()
                  VariableReference TargetTR2: VariableName=[TargetTaprootRootRatio].Value()
                MultiplyFunction Denominator
                  AddFunction SRs: same as Replacements.Plantain.Leaf.DMDemandFunction.PartitionFraction.Vegetative.LeafFraction.Denominator
                  AddFunction TRs
                    MultiplyFunction TargetTRs
                      VariableReference TargetTR1: VariableName=[TargetTaprootRootRatio].Value()
                      VariableReference TargetTR2: VariableName=[TargetTaprootRootRatio].Value()
                    VariableReference CurrentTR: VariableName=[TaprootRootRatio].Value()
        Constant DMConversionEfficiency: FixedValue=1; Units=0-1
        Constant MaintenanceRespirationFunction: FixedValue=0; Units=0-1
        MultiplyFunction SenescenceRate
          Constant ReferenceRate: FixedValue=0.001; Units=/day
          WeightedTemperatureFunction TemperatureFactor: MaximumTemperatureWeighting=0.5
            XYPairs: X=[0, 5, 20, 30]; Y=[0, 0, 1, 1]
          LinearInterpolationFunction SoilMoistureFactor: XProperty=[Arbitrator].FW
            XYPairs: X=[0, 0.5, 1]; Y=[1, 1, 1]
          Constant SoilAerationFactor: FixedValue=1; Units=0-1
        Constant DetachmentRateFunction: FixedValue=1; Units=/day
        Constant DMRetranslocationFactor: FixedValue=0; Units=/day
        Constant NRetranslocationFactor: FixedValue=0; Units=/day
        Constant NReallocationFactor: FixedValue=1; Units=/day
        Biomass Live
        Biomass Dead
        BiomassRemoval BiomassRemovalDefaults: same as Replacements.Plantain.Leaf.BiomassRemovalDefaults
      Root: GrowthRespiration=0; MaintenanceRespiration=0
        Memo Description
          This represents all the fine roots of the plant
          The root organ demands and is partitioned N and DM and its depth increases through time to provide a water uptake supply
        Constant InitialDM: FixedValue=0.01; Units=g/plant
        Constant StructuralFraction: FixedValue=1; Units=g/g
        Constant MinimumNConc: FixedValue=0.005; Units=gN/gDM
        Constant MaximumNConc: FixedValue=0.015; Units=gN/gDM
        PhaseBasedSwitch NitrogenDemandSwitch: Start=Germination; End=Ripening
        PhaseLookup PartitionFraction
          PhaseLookupValue AllPhases: Start=Emergence; End=Ripening
            DivideFunction RootFraction
              MultiplyFunction Numerator
                VariableReference CurrentSR: VariableName=[ShootRootRatio].Value()
                VariableReference CurrentTR: VariableName=[TaprootRootRatio].Value()
              MultiplyFunction Denominator: same as Replacements.Plantain.Taproot.DMDemandFunction.PartitionFraction.AllPhases.TaprootFraction.Denominator
        Constant MaximumRootDepth: FixedValue=1000; Units=mm
        PhaseLookup RootFrontVelocity
          PhaseLookupValue PreEmergence: Start=Germination; End=Emergence
            Constant ReferenceVelocity: FixedValue=5; Units=mm/day
          PhaseLookupValue Vegetative: Start=Emergence; End=Flowering
            Constant ReferenceVelocity: FixedValue=10; Units=mm/day
          PhaseLookupValue Reproductive: Start=Flowering; End=Ripening
            Constant ReferenceVelocity: FixedValue=7.5; Units=mm/day
        Constant TemperatureEffect: FixedValue=1
          Memo
            No effect of temperature on root growth is currently captured in the model.
        Constant SoilWaterEffect: FixedValue=1
          Memo
            No effect of soil water content on root growth is currently captured in the model.
        Constant SpecificRootLength: FixedValue=100; Units=m/g
        MultiplyFunction SenescenceRate
          Constant ReferenceRate: FixedValue=0.005; Units=/day
          WeightedTemperatureFunction TemperatureFactor: MaximumTemperatureWeighting=0.5
            XYPairs: X=[0, 5, 20, 30]; Y=[0, 0, 1, 1]
          LinearInterpolationFunction SoilMoistureFactor: XProperty=[Arbitrator].FW
            XYPairs: X=[0, 0.5, 1]; Y=[1, 1, 1]
          Constant SoilAerationFactor: FixedValue=1
        Constant DMRetranslocationFactor: FixedValue=0; Units=/day
        Constant NRetranslocationFactor: FixedValue=0; Units=/day
        Constant NReallocationFactor: FixedValue=0; Units=/day
        LinearInterpolationFunction KLModifier: XProperty=[Root].LengthDensity
          XYPairs: X=[0, 1]; Y=[1, 1]
        LinearInterpolationFunction KNH4: XProperty=[Root].LengthDensity
          XYPairs: X=[0, 0.003]; Y=[0.01, 0.02]
        LinearInterpolationFunction KNO3: XProperty=[Root].LengthDensity
          XYPairs: X=[0, 0.003]; Y=[0.02, 0.03]
        Constant MaxDailyNUptake: FixedValue=10; Units=kgN/ha
        LinearInterpolationFunction NUptakeSWFactor: XProperty=[Root].RWC
          XYPairs: X=[0, 0.5, 1]; Y=[0, 1, 1]
        CompositeBiomass Live: Propertys=[[Root].LayerLive]
        CompositeBiomass Dead: Propertys=[[Root].LayerDead]
        BiomassRemoval BiomassRemovalDefaults: same as Replacements.Plantain.Leaf.BiomassRemovalDefaults
      CompositeBiomass AboveGround
        Propertys=[[Leaf].Live, [Leaf].Dead, [Stem].Live, [Stem].Dead, [Inflorescence].Live, [Inflorescence].Dead]
      CompositeBiomass AboveGroundLive: Propertys=[[Leaf].Live, [Stem].Live, [Inflorescence].Live]
      CompositeBiomass BelowGround: Propertys=[[Root].Live, [Root].Dead, [Taproot].Live, [Taproot].Dead]
      CompositeBiomass BelowGroundLive: Propertys=[[Root].Live, [Taproot].Live]
      CompositeBiomass Total
        Propertys=[[Leaf].Live, [Leaf].Dead, [Stem].Live, [Stem].Dead, [Inflorescence].Live, [Inflorescence].Dead, [Root].Live, [Root].Dead, [Taproot].Live, [Taproot].Dead]
      DivideFunction PerPlantBelowGroundWt
        Memo Description
          This represents the live biomass dry weight below ground for a specific plant (in g/plant)
        VariableReference BelowGroundWt: VariableName=[BelowGroundLive].Wt
        VariableReference Population: VariableName=[Plantain].Population
      PhaseLookup ShootRootRatio
        PhaseLookupValue AllPhases: Start=Emergence; End=Ripening
          DivideFunction CurrentSR
            VariableReference AbogeGroundDM: VariableName=[AboveGroundLive].StructuralWt
            VariableReference BelowGroundDM: VariableName=[BelowGroundLive].StructuralWt
      PhaseLookup TargetShootRootRatio
        PhaseLookupValue Vegetative: Start=Emergence; End=Flowering
          Constant TargetSR: FixedValue=1.5; Units=g/g
        PhaseLookupValue Reproductive: Start=Flowering; End=Ripening
          AddFunction TargetSR
            VariableReference MinTargetSR: VariableName=[TargetShootRootRatio].Vegetative.TargetSR.Value()
            MultiplyFunction PlusTarget
              SubtractFunction DeltaTarget
                Constant MaxTargetSR: FixedValue=2; Units=g/g
                VariableReference MinTargetSR: VariableName=[TargetShootRootRatio].Vegetative.TargetSR.Value()
              LinearInterpolationFunction StageEffect: XProperty=[Phenology].Photoperiod.Value()
                XYPairs: X=[11, 12, 13, 14, 15, 16]; Y=[0, 0, 0.1, 0.75, 1, 1]
      PhaseLookup StemsLeafRatio
        PhaseLookupValue Reproductive: Start=Flowering; End=Ripening
          DivideFunction CurrentSL
            AddFunction StemFlowerDM
              VariableReference StemDM: VariableName=[Stem].Live.Wt
              VariableReference InflorescenceDM: VariableName=[Inflorescence].Live.Wt
            VariableReference LeafDM: VariableName=[Leaf].Live.Wt
      PhaseLookup TargetStemsLeafRatio
        PhaseLookupValue Reproductive: Start=Flowering; End=Ripening
          MultiplyFunction TargetSL
            Constant MaximumSL: FixedValue=0.25; Units=g/g
            LinearInterpolationFunction PhotoPeriodEffect: XProperty=[Phenology].Photoperiod.Value()
              XYPairs: X=[11, 12, 13, 14, 15, 16]; Y=[0, 0, 0.1, 0.5, 1, 1]
      PhaseLookup FlowerStemRatio
        PhaseLookupValue Reproductive: Start=Flowering; End=Ripening
          DivideFunction CurrentFS
            VariableReference InflorescenceDM: VariableName=[Inflorescence].Live.Wt
            VariableReference StemDM: VariableName=[Stem].Live.Wt
      PhaseLookup TargetFlowerStemRatio
        PhaseLookupValue Reproductive: Start=Flowering; End=Ripening
          MultiplyFunction TargetFS
            Constant MaximumFS: FixedValue=0.25; Units=g/g
            LinearInterpolationFunction PhotoPeriodEffect: XProperty=[Phenology].Photoperiod.Value()
              XYPairs: X=[11, 12, 13, 14, 15, 16]; Y=[0, 0, 0.1, 0.5, 1, 1]
      PhaseLookup TaprootRootRatio
        PhaseLookupValue AllPhases: Start=Emergence; End=Ripening
          DivideFunction CurrentTR
            VariableReference TaprootDM: VariableName=[Taproot].Live.Wt
            VariableReference RootsDM: VariableName=[Root].Live.Wt
      PhaseLookup TargetTaprootRootRatio
        PhaseLookupValue AllPhases: Start=Emergence; End=Ripening
          MultiplyFunction TargetTR
            Constant MaximumTR: FixedValue=1; Units=g/g
            LinearInterpolationFunction BiomassFactor: XProperty=[PerPlantBelowGroundWt].Value()
              XYPairs: X=[0, 0.05, 0.5, 1, 1.5, 2, 2.5]; Y=[1E-05, 1E-05, 0.4, 0.74, 0.93, 1, 1]
      CultivarFolder Cultivars
        Cultivar Lancelot
        Cultivar Tonic
    Manager Defoliate
      Crop =
      cutPasture_StartDate = 2050-05-20
      cutPasture_EndDate = 2100-12-31
      defoliateType = Graze
      interval2Cut = 21
      durationOfCut = 1
      removeAmountType = DMToRemove
      herbageAmount = 500
      fracDM2Remove = 1
      fracN2Remove = 1
      urineDepth = 10
      fracN2Dung = 0.4
      fracPopDecline = 0.05
```csharp
// Defoliates on a regular cycle or one-off via a schedule
// currently defoliates by the amount specified spread evenly over the specified period

using System;
using Models.Core;
using System.Collections.Generic;
using System.Text;
using Models;
using Models.Soils;
using Models.PMF;
using System.Xml.Serialization;
using APSIM.Shared.Utilities;

namespace Models
{
	[Serializable]
	public class Script : Model
	{
		[Link] Zone zone;
		[Link] Clock Clock;
		[Link] Plant Plantain;
		[Link] Fertiliser fertiliser;
		[Link] ISummary summary = null;

		[Description("Choose the crop to harvest:")]
		public ICrop Crop { get; set; }

		[Description("Enter the date to start the rotation (dd/mm/yyyy):")]
		public DateTime cutPasture_StartDate { get; set; }

		[Description("Enter the date to end the rotation (dd/mm/yyyy):")]
		public DateTime cutPasture_EndDate { get; set; }

		[Description("Select type of defoliation:")]
		public defoliationTypes defoliateType { get; set; }

		[Description("Enter the interval between defoliations (days):")]
		public int interval2Cut { get; set; }

		[Description("Enter the number of days to defoliate over (days):")]
		public int durationOfCut { get; set; }

		[Description("Choose what amount is being defined:")]
		public removeAmountTypes removeAmountType { get; set; }

		[Description("Enter the amount to use (kgDM/ha):")]
		public double herbageAmount { get; set; }

		[Description("Enter the fraction of DM that is removed from the field (0-1):")]
		public double fracDM2Remove { get; set; }

		[Description("Enter the fraction of N that is removed from the field (0-1):")]
		public double fracN2Remove { get; set; }

		[Description("Enter the depth down to which urine will applied (mm):")]
		public double urineDepth { get; set; }

		[Description("Enter the proportion of N returned in dung (0-1):")]
		public double fracN2Dung { get; set; }

		[Description("Enter the fraction of population decline due to defoliation (0-1):")]
		public double fracPopDecline { get; set; }

		//fraction of each plant part returned as residue (0-1), wastage
		private double leafResidueFrac = 0.01;
		private double stemResidueFrac = 0.01;
		private double flowerResidueFrac = 0.01;
		private double minLeafAmount = 5.0;

		//Outputs
		//Pasture DM defoliated today (kg/ha)
		[XmlIgnore] public double DefoliatedDM{ get; set; }
		//N defoliate today
		[XmlIgnore] public double DefoliatedN{ get; set; }
		//Pasture DM harvested today (kg/ha)
		[XmlIgnore] public double HarvestedDM{ get; set; }
		//N harvested today
		[XmlIgnore] public double HarvestedN{ get; set; }
		//DM removed from the paddock
		[XmlIgnore] public double RemovedDM{ get; set; }
		//N removed from the paddock
		[XmlIgnore] public double RemovedN{ get; set; }
		//DM returned to the paddock
		[XmlIgnore] public double ReturnedDM{ get; set; }
		//N returned to the paddock
		[XmlIgnore] public double ReturnedN{ get; set; }
		//N returned as dung (SurfaceOM)
		[XmlIgnore] public double NReturnedInDung{ get; set; }
		//N returned as urine (urea)
		[XmlIgnore] public double NReturnedInUrine{ get; set; }
		//Number of days after last harvest
		[XmlIgnore] public int DaysAfterCut{ get; set; }
		//Total standing DM (Leaf + Stem/Sheath) before cut
		[XmlIgnore] public double PreHarvestDM{ get; set; }
		//Total standing DM (Leaf + Stem/Sheath) after cut
		[XmlIgnore] public double PostHarvestDM{ get; set; }

		//Pasture DM harvested this rotation (kg/ha)
		[XmlIgnore] public double RotationHarvestedDM{ get; set; }
		//Pasture DM to be harvested this rotation (kg/ha)
		[XmlIgnore] public double RotationHarvestingDM{ get; set; }

		//Internal variables
		private RemovalFractions removalFractions;
		//The fraction of urine to be applied in each layer
		private double[] FracLayer;
		// total herbage to remove in g/m2 per day
		private double herbageToRemove;
		// counter
		private int daysCutting = 0;
		// type of defoliation (Cut or Graze)
		private string defoliationType;
		// type of DM amount (ResidualDM or DMToRemove)
		private string amountType;
		// auxiliary
		private bool aCutHasHappened = false;
		private bool isStillCutting = false;
		private double cumAmountHarvested;

		// event to add residue / dung to surface OM
		public event BiomassRemovedDelegate BiomassRemoved;

		[EventSubscribe("Commencing")]
		private void OnSimulationCommencing(object sender, EventArgs e)
		{
			removalFractions = new RemovalFractions();
			DaysAfterCut = 0;
			resetVariables();
			if (defoliateType == defoliationTypes.Cut)
				defoliationType = "Cut";
			else
				defoliationType = "Graze";

			if (removeAmountType == removeAmountTypes.ResidualDM)
				amountType = "ResidualDM";
			else
				amountType = "DMToRemove";

			// make sure that rotation start when startDate<simulationStartDay
			if ((Clock.Today > cutPasture_StartDate) && (Clock.Today < cutPasture_EndDate))
				cutPasture_StartDate = Clock.Today;
		}

		[EventSubscribe("DoManagement")]
		private void OnDoManagement(object sender, EventArgs e)
		{
			if (Clock.Today == cutPasture_StartDate)
				DaysAfterCut = interval2Cut;

			if ((Clock.Today >= cutPasture_StartDate) && (Clock.Today <= cutPasture_EndDate))
			{
				// Check whether we should start cutting
				if ((Plantain.IsEmerged) && (DaysAfterCut > 0) && (DaysAfterCut == interval2Cut))
				{
					Defoliate(defoliationType, herbageAmount * 0.1, amountType, durationOfCut);
				}
			}

			// Check whether we need to continue cutting
			//if ((daysCutting > 0) && (daysCutting <= durationOfCut))
			if (isStillCutting)
			{
				// reset outputs
				resetVariables();

				removeDM(herbageToRemove, defoliationType);
				returnExcreta();
				cumAmountHarvested += HarvestedDM;
				daysCutting += 1;
			}

			// reset outputs
			if (daysCutting < 0)
			{
				resetVariables();
				daysCutting = 0;
			}
		}

		[EventSubscribe("DoManagementCalculations")]
		private void OnDoManagementCalculations(object sender, EventArgs e)
		{
			if ((daysCutting > 0) && (daysCutting < durationOfCut))
				isStillCutting = true;

			if (daysCutting == durationOfCut)
			{
				PostHarvestDM = (double)zone.Get("Plantain.AboveGround.Wt");
				RotationHarvestedDM = cumAmountHarvested;
				aCutHasHappened = true;
				isStillCutting = false;
				daysCutting = -1;
				Plantain.Population = Plantain.Population * (1.0 - fracPopDecline);
			}

			if (aCutHasHappened && (daysCutting == 0))
				DaysAfterCut += 1;
		}

		public enum removeAmountTypes
		{
			/// <summary>Setting DM amount to remove</summary>
			DMToRemove,
			/// <summary>Setting residual DM amount</summary>
			ResidualDM
		}

		public enum defoliationTypes
		{
			/// <summary>Cut</summary>
			Cut,
			/// <summary>Graze</summary>
			Graze
		}

		// resets the values of all outputs
		private void resetVariables()
		{
			DefoliatedDM = 0.0;
			DefoliatedN = 0.0;
			HarvestedDM = 0.0;
			HarvestedN = 0.0;
			RemovedDM = 0.0;
			RemovedN = 0.0;
			ReturnedDM = 0.0;
			ReturnedN = 0.0;
			NReturnedInDung = 0.0;
			NReturnedInUrine = 0.0;
			RotationHarvestedDM = 0.0;
			RotationHarvestingDM = 0.0;
		}

		// Perform the basic calculations for defoliation
		public void Defoliate(string defoliationType, double amountDM, string amountType, int duration)
		{
			// get the existing plant amount
			PreHarvestDM = (double)zone.Get("Plantain.AboveGround.Wt");

			// check duration
			if (duration <= 0)
				throw new Exception("Duration of graze/cut rotation is zero or negative");
			
			// check amount to remove
			if ((amountType == "DMToRemove") && (PreHarvestDM > 0.0))
			{
				summary.WriteMessage(this, "   Defoliating " + (10.0 * amountDM).ToString("#0.0") + "kg/ha over " + duration + " days");
				herbageToRemove = amountDM / duration;
			}
			else if ((amountType == "ResidualDM") && (PreHarvestDM > amountDM))
			{
				summary.WriteMessage(this, "   Defoliating down to approximately " + (10.0 * amountDM).ToString("#0.0") + "kg/ha over " + duration + " days");
				herbageToRemove = (PreHarvestDM - amountDM) / duration;
			}
			else
			{
				herbageToRemove = 0.0;
				summary.WriteMessage(this, "   Defoliation will not happend because there is not enough plant material");
				return;
			}

			RotationHarvestingDM = herbageToRemove * duration;
			durationOfCut = duration;
			// first defoliation
			removeDM(herbageToRemove, defoliationType);
			returnExcreta();
			cumAmountHarvested = HarvestedDM;
			daysCutting = 1;
			DaysAfterCut = 0;
		}

		private void removeDM(double removeAmount, string removeType)
		{
			// get the existing biomass
			double leafLiveWt = (double)zone.Get("Plantain.Leaf.Live.Wt");
			double stemLiveWt = (double)zone.Get("Plantain.Stem.Live.Wt");
			double flowerLiveWt = (double)zone.Get("Plantain.Inflorescence.Live.Wt");
			double leafDeadWt = (double)zone.Get("Plantain.Leaf.Dead.Wt");
			double stemDeadWt = (double)zone.Get("Plantain.Stem.Dead.Wt");
			double flowerDeadWt = (double)zone.Get("Plantain.Inflorescence.Dead.Wt");
			double leafLiveN = (double)zone.Get("Plantain.Leaf.Live.N");
			double stemLiveN = (double)zone.Get("Plantain.Stem.Live.N");
			double flowerLiveN = (double)zone.Get("Plantain.Inflorescence.Live.N");
			double leafDeadN = (double)zone.Get("Plantain.Leaf.Dead.N");
			double stemDeadN = (double)zone.Get("Plantain.Stem.Dead.N");
			double flowerDeadN = (double)zone.Get("Plantain.Inflorescence.Dead.N");

			double existingWt = leafLiveWt + leafDeadWt + stemLiveWt + stemDeadWt + flowerLiveWt + flowerDeadWt;
			double existingN = leafLiveN + leafDeadN + stemLiveN + stemDeadN + flowerLiveN + flowerDeadN;

			// Can we harvest anything?
			double removingWt = Math.Min(existingWt, removeAmount);
			if (removingWt > 0.0)
			{
				// get the fractions to remove for each organ (will override the default values)
				// the default is [Plantain].Leaf.BiomassRemovalDefaults.Cut.FractionRemoved, or equivalent
				// >> double leafFracToRemove = removeAmount * (leafLiveWt + leafDeadWt) / existingWt / existingWt;
				double fracToRemove = removingWt / existingWt;
				double leafFracToRemove = 0.0;
				if ((leafLiveWt + leafDeadWt) > 0.0)
				{
					if (leafLiveWt < minLeafAmount)
					{
						// leafWt cannot go below a minimum
						leafFracToRemove = (removingWt + leafLiveWt - minLeafAmount) / existingWt;
					}
					else
						leafFracToRemove = fracToRemove;
				}

				double stemFracToRemove = ((stemLiveWt + stemDeadWt) > 0.0) ? fracToRemove : 0.0;
				double flowerFracToRemove = ((flowerLiveWt + flowerDeadWt) > 0.0) ? fracToRemove : 0.0;

				// get the fractions to residue (i.e. wastage - will override the default values)
				// the default is [Plantain].Leaf.BiomassRemovalDefaults.Cut.FractionToResidue, or equivalent
				double leafFracToResidue = leafResidueFrac * leafFracToRemove;
				double stemFracToResidue = stemResidueFrac * stemFracToRemove;
				double flowerFracToResidue = flowerResidueFrac * flowerFracToRemove;

				// correct the values to defoliate (so our removing = remove + residue)
				leafFracToRemove -= leafFracToResidue;
				stemFracToRemove -= stemFracToResidue;
				flowerFracToRemove -= flowerFracToResidue;

				// set removal fractions (these overrides the default removals in the plant)
				removalFractions.SetFractionToRemove("Leaf", leafFracToRemove, "Live");
				removalFractions.SetFractionToResidue("Leaf", leafFracToResidue, "Live");
				removalFractions.SetFractionToRemove("Leaf", leafFracToRemove, "Dead");
				removalFractions.SetFractionToResidue("Leaf", leafFracToResidue, "Dead");
				removalFractions.SetFractionToRemove("Stem", stemFracToRemove, "Live");
				removalFractions.SetFractionToResidue("Stem", stemFracToResidue, "Live");
				removalFractions.SetFractionToRemove("Stem", stemFracToRemove, "Dead");
				removalFractions.SetFractionToResidue("Stem", stemFracToResidue, "Dead");
				removalFractions.SetFractionToRemove("Inflorescence", flowerFracToRemove, "Live");
				removalFractions.SetFractionToResidue("Inflorescence", flowerFracToResidue, "Live");
				removalFractions.SetFractionToRemove("Inflorescence", flowerFracToRemove, "Dead");
				removalFractions.SetFractionToResidue("Inflorescence", flowerFracToResidue, "Dead");

				removalFractions.SetFractionToRemove("Root", 0.0);
				removalFractions.SetFractionToResidue("Root", 0.0);
				removalFractions.SetFractionToRemove("Taproot", 0.0);
				removalFractions.SetFractionToResidue("Taproot", 0.0);

				// Actually do the biomass removal
				Plantain.RemoveBiomass(removeType, removalFractions);

				// get the new existing plant amount
				double postHarvestWt = (double)zone.Get("Plantain.AboveGround.Wt");
				double postHarvestN = (double)zone.Get("Plantain.AboveGround.N");

				// get total defoliation (total plant stuff lost)
				DefoliatedDM = existingWt - postHarvestWt;
				DefoliatedN = existingN - postHarvestN;

				// get total harvested (plant stuff removed from plants)
				HarvestedDM = (double)zone.Get("Plantain.Leaf.Removed.Wt")
				+ (double)zone.Get("Plantain.Stem.Removed.Wt")
				+ (double)zone.Get("Plantain.Inflorescence.Removed.Wt");
				HarvestedN = (double)zone.Get("Plantain.Leaf.Removed.N")
				+ (double)zone.Get("Plantain.Stem.Removed.N")
				+ (double)zone.Get("Plantain.Inflorescence.Removed.N");

				// get amounts actually removed from field and that to be returned (residue or dung/urine)
				RemovedDM = HarvestedDM * fracDM2Remove;
				RemovedN = HarvestedN * fracN2Remove;
				ReturnedDM = HarvestedDM - RemovedDM;
				ReturnedN = HarvestedN - RemovedN;
				NReturnedInDung = ReturnedN * fracN2Dung;
				NReturnedInUrine = ReturnedN - NReturnedInDung;
			}
			else
			{
			}
		}

		// Return dung and urine
		private void returnExcreta()
		{
			if ((ReturnedDM > 0.0) || (NReturnedInDung > 0.0))
			{
				PMF.BiomassRemovedType BiomassDung = new PMF.BiomassRemovedType();
				string[] type = new string[] { "RuminantDung_PastureFed" };
				float[] dltdm = new float[] { (Single)ReturnedDM };
				float[] dltn = new float[] { (Single)NReturnedInDung };
				float[] dltp = new float[] { 0 };
				float[] fraction = new float[] { 1 };     // fraction is always 1.0 here

				BiomassDung.crop_type = "RuminantDung_PastureFed";
				BiomassDung.dm_type = type;
				BiomassDung.dlt_crop_dm = dltdm;
				BiomassDung.dlt_dm_n = dltn;
				BiomassDung.dlt_dm_p = dltp;
				BiomassDung.fraction_to_residue = fraction;
				BiomassRemoved.Invoke(BiomassDung);
			}

			if (NReturnedInUrine > 0.0)
			{
				fertiliser.Apply(NReturnedInUrine * 10, Fertiliser.Types.UreaN, urineDepth);
			}
		}
	}
}
```
    Manager ExtraVariables
```csharp
using System;
using Models.Core;
using System.Collections.Generic;
using System.Text;
using Models.Soils;
using Models.PMF;
using Models;
using System.Xml.Serialization;
using APSIM.Shared.Utilities;

namespace Models
{
	[Serializable] 
	public class Script : Model
	{
		[Link] Clock Clock;
		[Link] Soils.Soil Soil;
		[Link] Models.SurfaceOM.SurfaceOrganicMatter SOM;
		[Link] Weather Met;
		[Link] Fertiliser Fert;
		[Link] Irrigation Irrig;
		[Link] Plant Plantain;
		[Link] Zone zone;
		[Link] ISummary summary;
					
		[XmlIgnore] public bool InitialDay { get; set; }
		
		[XmlIgnore] public double AccumPlantN { get; set; }
		[XmlIgnore] public double AccumMineralisation { get; set; }
		[XmlIgnore] public double AccumDenit { get; set; }
		[XmlIgnore] public double AccumFert { get; set; }
		[XmlIgnore] public double AccumLeach { get; set; }
		[XmlIgnore] public double AccumDetach { get; set; }
		[XmlIgnore] public double DeltaSoilOMN { get; set; }
		[XmlIgnore] public double DeltaSurfaceOMN { get; set; }
		[XmlIgnore] public double DeltaSoilMineralN { get; set; }
		[XmlIgnore] public double SoilNitrogenContent { get; set; }
		
		[XmlIgnore] public double AccumEO { get; set; }
		[XmlIgnore] public double AccumEP { get; set; }
		[XmlIgnore] public double AccumES { get; set; }
		[XmlIgnore] public double AccumDrainage { get; set; }
		[XmlIgnore] public double AccumRunoff { get; set; }
		[XmlIgnore] public double AccumOutflowLat { get; set; }
		[XmlIgnore] public double AccumIrrigation { get; set; }
		[XmlIgnore] public double AccumRainfall { get; set; }
		[XmlIgnore] public double SoilWaterDeficit { get; set; }
	
		[XmlIgnore] public double  InitialSoilOMN { get; set; }
		[XmlIgnore] public double  InitialSurfaceOMN { get; set; }
		[XmlIgnore] public double  InitialMineralN { get; set; }
		
		[XmlIgnore] public double SWC { get; set; }
		[XmlIgnore] public double DUL { get; set; }
		[XmlIgnore] public double OutFlowLat { get; set; }

		[XmlIgnore] public double FomN { get; set; }
		[XmlIgnore] public double BiomN { get; set; }
		[XmlIgnore] public double HumN { get; set; }
		[XmlIgnore] public double OrganicN { get; set; }
		[XmlIgnore] public double NO3N { get; set; }
		[XmlIgnore] public double NH4N { get; set; }
		[XmlIgnore] public double UreaN { get; set; }
		[XmlIgnore] public double MineralN { get; set; }
		[XmlIgnore] public double DltNMinRes { get; set; }
		[XmlIgnore] public double DltNMinTot { get; set; }
		
		[XmlIgnore] public double LeafFraction { get; set; }
		[XmlIgnore] public double StemFraction { get; set; }
		[XmlIgnore] public double InflorescenceFraction { get; set; }
		
		[XmlIgnore] public double ShootRootRatio { get; set; }

		[XmlIgnore] public double Leaf_DMSupply { get; set; }
		[XmlIgnore] public double Stem_DMSupply { get; set; }
		[XmlIgnore] public double Inflorescence_DMSupply { get; set; }
		[XmlIgnore] public double Root_DMSupply { get; set; }
		[XmlIgnore] public double Taproot_DMSupply { get; set; }
		[XmlIgnore] public double Leaf_DMDemand { get; set; }
		[XmlIgnore] public double Stem_DMDemand { get; set; }
		[XmlIgnore] public double Inflorescence_DMDemand { get; set; }
		[XmlIgnore] public double Root_DMDemand { get; set; }
		[XmlIgnore] public double Taproot_DMDemand { get; set; }
		
		[XmlIgnore] public double Leaf_NSupply { get; set; }
		[XmlIgnore] public double Stem_NSupply { get; set; }
		[XmlIgnore] public double Inflorescence_NSupply { get; set; }
		[XmlIgnore] public double Taproot_NSupply { get; set; }
		[XmlIgnore] public double Root_NSupply { get; set; }
		[XmlIgnore] public double Leaf_NDemand { get; set; }
		[XmlIgnore] public double Stem_NDemand { get; set; }
		[XmlIgnore] public double Inflorescence_NDemand { get; set; }
		[XmlIgnore] public double Taproot_NDemand { get; set; }
		[XmlIgnore] public double Root_NDemand { get; set; }
		
		[XmlIgnore] public double Leaf_NSupplyReallocation { get; set; }
		[XmlIgnore] public double Stem_NSupplyReallocation { get; set; }
		[XmlIgnore] public double Root_NSupplyReallocation { get; set; }
		
		[EventSubscribe("Commencing")]
		private void OnSimulationCommencing(object sender, EventArgs e)
		{
			InitialDay = true;
		}
		
		[EventSubscribe("DoManagement")]
		private void OnDoManagement(object sender, EventArgs e)
		{
			//!!!!!! Nitrogen balance components !!!!!!
			//!!!!!!^^^^^^^^^^^^^^^^^^^^^^^^^^^^^!!!!!!
			FomN = MathUtilities.Sum(Soil.SoilNitrogen.FOMN);
			HumN = MathUtilities.Sum(Soil.SoilNitrogen.HumicN);
			BiomN = MathUtilities.Sum(Soil.SoilNitrogen.MicrobialN);
			OrganicN = FomN + HumN + BiomN;
			NO3N = MathUtilities.Sum(Soil.NO3N);
			NH4N = MathUtilities.Sum(Soil.NH4N);
			UreaN = MathUtilities.Sum(Soil.SoilNitrogen.urea);
			MineralN = NO3N + NH4N + UreaN; 
			DltNMinRes = MathUtilities.Sum(Soil.SoilNitrogen.dlt_n_min_res);
			DltNMinTot = MathUtilities.Sum(Soil.SoilNitrogen.MineralisedN);
			int layers = Soil.Thickness.Length;
			if (InitialDay == true)
			{
				InitialSurfaceOMN = SOM.N;
				InitialSoilOMN = OrganicN;
				InitialMineralN = MineralN;
				InitialDay = false;
			}
			DeltaSurfaceOMN = SOM.N - InitialSurfaceOMN;
			AccumLeach = AccumLeach - Soil.SoilWater.LeachNH4 - Soil.SoilWater.LeachNO3 - Soil.SoilWater.LeachUrea; //Fails
			AccumMineralisation += MathUtilities.Sum(Soil.SoilNitrogen.MineralisedN);
			AccumDenit -= MathUtilities.Sum(Soil.SoilNitrogen.Denitrification);
			AccumPlantN -= (double)zone.Get("Plantain.Root.NUptake");
			DeltaSoilOMN = OrganicN - InitialSoilOMN;
			DeltaSoilMineralN = MineralN - InitialMineralN;
			SoilNitrogenContent = MineralN;
			
			//!!!!!! Water balance components !!!!!!
			//!!!!!!^^^^^^^^^^^^^^^^^^^^^^^^^^!!!!!!

			AccumRainfall += Met.Rain;
			//AccumEP -= (double)zone.Get("[Plantain].Leaf.Transpiration");
			AccumEP -= (double)zone.Get("Plantain.Root.WaterUptake");
			SoilWaterDeficit = (SWC - DUL);
			double OutFlowLat = MathUtilities.Sum(Soil.SoilWater.outflow_lat);
			AccumOutflowLat -= OutFlowLat;
			
			//!!!!!! Stem and leaf fraction !!!!!!
			if ((double)zone.Get("Plantain.AboveGround.Wt") > 0)
			{
				LeafFraction = (double)zone.Get("Plantain.Leaf.Wt") / (double)zone.Get("Plantain.AboveGround.Wt");
				StemFraction = (double)zone.Get("Plantain.Stem.Wt") / (double)zone.Get("Plantain.AboveGround.Wt");
				InflorescenceFraction = (double)zone.Get("Plantain.Inflorescence.Wt") / (double)zone.Get("Plantain.AboveGround.Wt");
			}
			else
			{
				LeafFraction = 0;
				StemFraction = 0;
			}
			
			//!!!!!! Plant DM components !!!!!!
			//!!!!!!^^^^^^^^^^^^^^^^^^^^^^^^^^!!!!!!
			ShootRootRatio = MathUtilities.Divide((double)zone.Get("Plantain.AboveGroundLive.Wt"), (double)zone.Get("Plantain.BelowGroundLive.Wt"), 0.0);
			PMF.Interfaces.BiomassSupplyType Leaf_DMSupplies = (PMF.Interfaces.BiomassSupplyType)zone.Get("Plantain.Leaf.DMSupply");
			PMF.Interfaces.BiomassSupplyType Stem_DMSupplies = (PMF.Interfaces.BiomassSupplyType)zone.Get("Plantain.Stem.DMSupply");
			PMF.Interfaces.BiomassSupplyType Inflorescence_DMSupplies = (PMF.Interfaces.BiomassSupplyType)zone.Get("Plantain.Inflorescence.DMSupply");
			PMF.Interfaces.BiomassSupplyType Root_DMSupplies = (PMF.Interfaces.BiomassSupplyType)zone.Get("Plantain.Root.DMSupply");
			PMF.Interfaces.BiomassSupplyType Taproot_DMSupplies = (PMF.Interfaces.BiomassSupplyType)zone.Get("Plantain.Taproot.DMSupply");
			PMF.Interfaces.BiomassPoolType Leaf_DMDemands = (PMF.Interfaces.BiomassPoolType)zone.Get("Plantain.Leaf.DMDemand");
			PMF.Interfaces.BiomassPoolType Stem_DMDemands = (PMF.Interfaces.BiomassPoolType)zone.Get("Plantain.Stem.DMDemand");
			PMF.Interfaces.BiomassPoolType Inflorescence_DMDemands = (PMF.Interfaces.BiomassPoolType)zone.Get("Plantain.Inflorescence.DMDemand");
			PMF.Interfaces.BiomassPoolType Root_DMDemands = (PMF.Interfaces.BiomassPoolType)zone.Get("Plantain.Root.DMDemand");
			PMF.Interfaces.BiomassPoolType Taproot_DMDemands = (PMF.Interfaces.BiomassPoolType)zone.Get("Plantain.Taproot.DMDemand");

			PMF.Interfaces.BiomassSupplyType Leaf_NSupplies = (PMF.Interfaces.BiomassSupplyType)zone.Get("Plantain.Leaf.NSupply");
			PMF.Interfaces.BiomassSupplyType Stem_NSupplies = (PMF.Interfaces.BiomassSupplyType)zone.Get("Plantain.Stem.NSupply");
			PMF.Interfaces.BiomassSupplyType Inflorescence_NSupplies = (PMF.Interfaces.BiomassSupplyType)zone.Get("Plantain.Inflorescence.NSupply");
			PMF.Interfaces.BiomassSupplyType Taproot_NSupplies = (PMF.Interfaces.BiomassSupplyType)zone.Get("Plantain.Taproot.NSupply");
			PMF.Interfaces.BiomassSupplyType Root_NSupplies = (PMF.Interfaces.BiomassSupplyType)zone.Get("Plantain.Root.NSupply");
			
			PMF.Interfaces.BiomassPoolType Leaf_NDemands = (PMF.Interfaces.BiomassPoolType)zone.Get("Plantain.Leaf.NDemand");
			PMF.Interfaces.BiomassPoolType Stem_NDemands = (PMF.Interfaces.BiomassPoolType)zone.Get("Plantain.Stem.NDemand");
			PMF.Interfaces.BiomassPoolType Inflorescence_NDemands = (PMF.Interfaces.BiomassPoolType)zone.Get("Plantain.Inflorescence.NDemand");
			PMF.Interfaces.BiomassPoolType Taproot_NDemands = (PMF.Interfaces.BiomassPoolType)zone.Get("Plantain.Taproot.NDemand");
			PMF.Interfaces.BiomassPoolType Root_NDemands = (PMF.Interfaces.BiomassPoolType)zone.Get("Plantain.Root.NDemand");
			
			Leaf_DMSupply = Leaf_DMSupplies.Fixation + Leaf_DMSupplies.Uptake + Leaf_DMSupplies.Reallocation + Leaf_DMSupplies.Retranslocation;
			Stem_DMSupply = Stem_DMSupplies.Fixation + Stem_DMSupplies.Uptake + Stem_DMSupplies.Reallocation + Stem_DMSupplies.Retranslocation;
			Inflorescence_DMSupply = Inflorescence_DMSupplies.Fixation + Inflorescence_DMSupplies.Uptake + Inflorescence_DMSupplies.Reallocation + Inflorescence_DMSupplies.Retranslocation;
			Root_DMSupply = Root_DMSupplies.Fixation + Root_DMSupplies.Uptake + Root_DMSupplies.Reallocation + Root_DMSupplies.Retranslocation;
			Taproot_DMSupply = Taproot_DMSupplies.Fixation + Taproot_DMSupplies.Uptake + Taproot_DMSupplies.Reallocation + Taproot_DMSupplies.Retranslocation;
			Leaf_DMDemand = Leaf_DMDemands.Structural + Leaf_DMDemands.NonStructural + Leaf_DMDemands.Metabolic;
			Stem_DMDemand = Stem_DMDemands.Structural + Stem_DMDemands.NonStructural + Stem_DMDemands.Metabolic;
			Inflorescence_DMDemand = Inflorescence_DMDemands.Structural + Inflorescence_DMDemands.NonStructural + Inflorescence_DMDemands.Metabolic;
			Root_DMDemand = Root_DMDemands.Structural + Root_DMDemands.NonStructural + Root_DMDemands.Metabolic;
			Taproot_DMDemand = Taproot_DMDemands.Structural + Taproot_DMDemands.NonStructural + Taproot_DMDemands.Metabolic;
			
			Leaf_NSupply = Leaf_NSupplies.Fixation + Leaf_NSupplies.Uptake + Leaf_NSupplies.Reallocation + Leaf_NSupplies.Retranslocation;
			Stem_NSupply = Stem_NSupplies.Fixation + Stem_NSupplies.Uptake + Stem_NSupplies.Reallocation + Stem_NSupplies.Retranslocation;
			Inflorescence_NSupply = Inflorescence_NSupplies.Fixation + Inflorescence_NSupplies.Uptake + Inflorescence_NSupplies.Reallocation + Inflorescence_NSupplies.Retranslocation;
			Taproot_NSupply = Taproot_NSupplies.Fixation + Taproot_NSupplies.Uptake + Taproot_NSupplies.Reallocation + Taproot_NSupplies.Retranslocation;
			Root_NSupply = Root_NSupplies.Fixation + Root_NSupplies.Uptake + Root_NSupplies.Reallocation + Root_NSupplies.Retranslocation;

			Leaf_NDemand = Leaf_NDemands.Structural + Leaf_NDemands.NonStructural + Leaf_NDemands.Metabolic;
			Stem_NDemand = Stem_NDemands.Structural + Stem_NDemands.NonStructural + Stem_NDemands.Metabolic;
			Inflorescence_NDemand = Inflorescence_NDemands.Structural + Inflorescence_NDemands.NonStructural + Inflorescence_NDemands.Metabolic;
			Taproot_NDemand = Taproot_NDemands.Structural + Taproot_NDemands.NonStructural + Taproot_NDemands.Metabolic;
			Root_NDemand = Root_NDemands.Structural + Root_NDemands.NonStructural + Root_NDemands.Metabolic;

			Leaf_NSupplyReallocation = Leaf_NSupplies.Reallocation;
			Stem_NSupplyReallocation = Stem_NSupplies.Reallocation;
			Root_NSupplyReallocation = Root_NSupplies.Reallocation;
			
			//summary.WriteMessage(this, "   Root.Fixation: " + Root_NSupplies.Fixation.ToString());
			//summary.WriteMessage(this, "   Root.Uptake: " + Root_NSupplies.Uptake.ToString());
			//summary.WriteMessage(this, "   Root.Reallocation: " + Root_NSupplies.Reallocation.ToString());
			//summary.WriteMessage(this, "   Root.Retranslocation: " + Root_NSupplies.Retranslocation.ToString());
			//summary.WriteMessage(this, "   Stem.Fixation: " + Stem_NSupplies.Fixation.ToString());
			//summary.WriteMessage(this, "   Stem.Uptake: " + Stem_NSupplies.Uptake.ToString());
			//summary.WriteMessage(this, "   Stem.Reallocation: " + Stem_NSupplies.Reallocation.ToString());
			//summary.WriteMessage(this, "   Stem.Retranslocation: " + Stem_NSupplies.Retranslocation.ToString());	
	
			
		}
		
		[EventSubscribe("DoManagementCalculations")]
		private void OnDoManagementCalculations(object sender, EventArgs e)
		{
			FomN = MathUtilities.Sum(Soil.SoilNitrogen.FOMN);
			HumN = MathUtilities.Sum(Soil.SoilNitrogen.HumicN);
			BiomN = MathUtilities.Sum(Soil.SoilNitrogen.MicrobialN);
			AccumFert += Fert.NitrogenApplied;
			AccumIrrigation += Irrig.IrrigationApplied;
			
			
			AccumEO -= Soil.SoilWater.Eo;
			AccumES -= Soil.SoilWater.Es; 
			AccumDrainage -= Soil.SoilWater.Drainage;
			AccumRunoff -= Soil.SoilWater.Runoff;
			SWC = MathUtilities.Sum(Soil.SoilWater.SWmm);
			DUL = MathUtilities.Sum(Soil.SoilWater.DULmm);
		}
	}
}
```
    Report: EventNames=[Clock].DoReport
      VariableNames:
        [Clock].Today as Date
        [MicroClimate].net_radn
        [Weather].Radn as SolarRadiation
        [Plantain].Leaf.RadIntTot as InterceptedRadiation
        [Weather].Rain as Rainfall
        [Irrigation].IrrigationApplied as IrrigationApplied
        [Soil].SoilWater.Eo as Eo
        [Soil].SoilWater.Es as Evaporation
        [Plantain].Leaf.Transpiration as Transpiration
        [Soil].SoilWater.pond as PondedWater
        [Soil].SoilWater.Drainage as Drainage
        [Soil].SoilWater.Runoff as Runoff
        sum([Soil].SoilWater.outflow_lat) as LateralFlow
        sum([Soil].SoilWater.SWmm) as TotalSWC
        sum([Soil].SoilWater.DULmm) as TotalDUL
        [Fertiliser].NitrogenApplied as FertiliserN
        sum([Soil].SoilNitrogen.Denitrification) as DenitrifiedN
        ([Soil].SoilWater.LeachNH4 + [Soil].SoilWater.LeachNO3) as LeachedN
        (-1*[Plantain].Root.NUptake) as UptakeN
        sum([Soil].SoilNitrogen.MineralisedN) as MineralisedSoilN
        sum([Soil].SoilNitrogen.dlt_n_min_res) as MineralisedSurfOMN
        ([Plantain].Leaf.Detached.N+[Plantain].Stem.Detached.N+[Plantain].Inflorescence.Detached.N) as DetachedAGN
        ([Plantain].Taproot.Detached.N+[Plantain].Root.Detached.N) as DetachedBGN
        (sum([Soil].SoilNitrogen.urea) + sum([Soil].SoilNitrogen.NH4) + sum([Soil].SoilNitrogen.NO3)) as SoilNContent
        sum([Soil].SoilNitrogen.urea) as SoilUrea
        sum([Soil].SoilNitrogen.NH4) as SoilNH4
        sum([Soil].SoilNitrogen.NO3) as SoilNO3
        (sum([Soil].SoilNitrogen.NH4[1:3])+sum([Soil].SoilNitrogen.NO3[1:3])) as TopSoilN
        [SurfaceOrganicMatter].N as TotalSurfOMN
        sum([Soil].SoilNitrogen.FOMN) as TotalFOMN
        sum([Soil].SoilNitrogen.HumicN) as TotalHumicN
        sum([Soil].SoilNitrogen.MicrobialN as TotalMicrobialN
        ([Plantain].Total.N) as TotalPlantN
        [Defoliate].Script.RotationHarvestingDM
        [Defoliate].Script.RotationHarvestedDM as RotationHarvestedWt
        [Defoliate].Script.PreHarvestDM
        [Defoliate].Script.PostHarvestDM
        [Defoliate].Script.DefoliatedDM
        [Defoliate].Script.HarvestedDM
        [Defoliate].Script.RemovedDM
        [Defoliate].Script.DefoliatedN
        [Defoliate].Script.HarvestedN
        [Defoliate].Script.RemovedN
        [Defoliate].Script.NReturnedInDung
        [Defoliate].Script.NReturnedInUrine
        [Defoliate].Script.DefoliatedDM as HarvestedWt
        [Defoliate].Script.DaysAfterCut
        [Plantain].Phenology.ThermalTime.Value()
        [Plantain].Phenology.Photoperiod.Value()
        [Plantain].Phenology.Vernalisation.TodaysVernalisation
        [Plantain].Phenology.Vernalisation.DaysVernalised
        [Plantain].Population
        [Plantain].Phenology.CurrentPhaseName
        [Plantain].Phenology.Stage
        [Plantain].Root.LengthDensity
        [Plantain].Leaf.ExtinctionCoefficientFunction.Value()
        [Plantain].AboveGroundLive.Wt
        ([Plantain].Leaf.Live.Wt / ([Plantain].AboveGroundLive.Wt + 0.000001)) as LeafFraction
        ([Plantain].Stem.Live.Wt / ([Plantain].AboveGroundLive.Wt + 0.000001)) as StemFraction
        ([Plantain].Inflorescence.Live.Wt / ([Plantain].AboveGroundLive.Wt + 0.000001)) as FlowerFraction
        ([Plantain].Taproot.Live.Wt / ([Plantain].BelowGround.Wt + 0.000001)) as TaprootFraction
        ([Plantain].Root.Live.Wt / ([Plantain].BelowGround.Wt + 0.000001)) as RootFraction
        [Plantain].Arbitrator.DM.TotalFixationSupply
        [Plantain].Arbitrator.DM.TotalPlantDemand
        [Plantain].Arbitrator.DM.Allocated
        [Plantain].Arbitrator.DM.SinkLimitation
        [Plantain].Arbitrator.DM.NutrientLimitation
        [Plantain].Arbitrator.FDM
        [ExtraVariables].Script.Leaf_DMSupply
        [ExtraVariables].Script.Stem_DMSupply
        [ExtraVariables].Script.Inflorescence_DMSupply
        [ExtraVariables].Script.Root_DMSupply
        [ExtraVariables].Script.Taproot_DMSupply
        [ExtraVariables].Script.Leaf_DMDemand
        [ExtraVariables].Script.Stem_DMDemand
        [ExtraVariables].Script.Inflorescence_DMDemand
        [ExtraVariables].Script.Root_DMDemand
        [ExtraVariables].Script.Taproot_DMDemand
        [Plantain].Arbitrator.N.TotalPlantSupply
        [Plantain].Arbitrator.N.TotalPlantDemand
        [Plantain].Arbitrator.N.Allocated
        [Plantain].Arbitrator.FN
        [Plantain].Arbitrator.WSupply
        [Plantain].Arbitrator.WDemand
        [Plantain].Arbitrator.WAllocated
        [Plantain].Arbitrator.FW
        [Plantain].Root.NSupplyUptake
        [Plantain].Root.NTakenUp
        [Plantain].Root.NSupply.Uptake
        [Plantain].Root.NUptake
        [ExtraVariables].Script.Leaf_NSupply
        [ExtraVariables].Script.Stem_NSupply
        [ExtraVariables].Script.Inflorescence_NSupply
        [ExtraVariables].Script.Root_NSupply
        [ExtraVariables].Script.Taproot_NSupply
        [ExtraVariables].Script.Leaf_NDemand
        [ExtraVariables].Script.Stem_NDemand
        [ExtraVariables].Script.Inflorescence_NDemand
        [ExtraVariables].Script.Root_NDemand
        [ExtraVariables].Script.Taproot_NDemand
        [Plantain].ShootRootRatio.Value()
        [Plantain].TargetShootRootRatio.Value()
        [Plantain].AdjustedShootRootRatio.Value()
        [Plantain].Leaf.DMDemandFunction.PartitionFraction.Value()
        [Plantain].Stem.DMDemandFunction.PartitionFraction.Value()
        [Plantain].Inflorescence.DMDemandFunction.PartitionFraction.Value()
        [Plantain].Taproot.DMDemandFunction.PartitionFraction.Value()
        [Plantain].Root.PartitionFraction.Value()
        [Plantain].StemsLeafRatio.Value()
        [Plantain].FlowerStemRatio.Value()
        [Plantain].TaprootRootRatio.Value()
        [Plantain].TargetStemsLeafRatio.Value()
        [Plantain].TargetFlowerStemRatio.Value()
        [Plantain].TargetTaprootRootRatio.Value()
        [Plantain].Total.Wt
        [Plantain].Total.N
        [Plantain].Total.NConc
        [Plantain].AboveGround.Wt
        [Plantain].BelowGround.Wt
        [Plantain].AboveGround.N
        [Plantain].BelowGround.N
        [Plantain].AboveGroundLive.NConc
        [Plantain].BelowGroundLive.NConc
        [Plantain].Leaf.Wt
        [Plantain].Leaf.Live.Wt
        [Plantain].Leaf.Live.N
        [Plantain].Leaf.Live.NConc
        [Plantain].Leaf.Dead.Wt
        [Plantain].Leaf.Dead.NConc
        [Plantain].Leaf.CoverTotal
        [Plantain].Leaf.CoverGreen
        [Plantain].Leaf.CoverDead
        [Plantain].Leaf.LAITotal
        [Plantain].Leaf.LAI
        [Plantain].Leaf.LAIDead
        [Plantain].Leaf.Height
        [Plantain].Leaf.PotentialBiomass.Value()
        [Plantain].Leaf.Transpiration
        [Plantain].Leaf.Fw
        [Plantain].Leaf.Fn
        [Plantain].Leaf.Photosynthesis.FCO2
        [Plantain].Leaf.Photosynthesis.FN
        [Plantain].Leaf.Photosynthesis.FT
        [Plantain].Leaf.Photosynthesis.FW
        [Plantain].Leaf.Photosynthesis.FVPD
        [Plantain].Leaf.FRGR
        [Plantain].Stem.Live.Wt
        [Plantain].Stem.Live.N
        [Plantain].Stem.Live.NConc
        [Plantain].Stem.Dead.Wt
        [Plantain].Stem.Dead.NConc
        [Plantain].Inflorescence.Live.Wt
        [Plantain].Inflorescence.Live.N
        [Plantain].Inflorescence.Live.NConc
        [Plantain].Inflorescence.Dead.Wt
        [Plantain].Inflorescence.Dead.NConc
        [Plantain].Taproot.Live.Wt
        [Plantain].Taproot.Live.N
        [Plantain].Taproot.Live.NConc
        [Plantain].Taproot.Dead.Wt
        [Plantain].Taproot.Dead.NConc
        [Plantain].Root.Live.Wt
        [Plantain].Root.Live.N
        [Plantain].Root.Live.NConc
        [Plantain].Root.Dead.Wt
        [Plantain].Root.Dead.NConc
        [Plantain].Root.Depth
        [Plantain].Root.WaterDemand
        [Plantain].Root.WaterUptake
        [Plantain].Leaf.Live.StructuralWt
        [Plantain].Leaf.Live.NonStructuralWt
        [Plantain].Leaf.Live.MetabolicWt
        [Plantain].Leaf.Live.StructuralN
        [Plantain].Leaf.Live.NonStructuralN
        [Plantain].Leaf.Live.MetabolicN
        [Plantain].Leaf.Dead.StructuralWt
        [Plantain].Leaf.Dead.NonStructuralWt
        [Plantain].Leaf.Dead.MetabolicWt
        [Plantain].Leaf.Dead.StructuralN
        [Plantain].Leaf.Dead.NonStructuralN
        [Plantain].Leaf.Dead.MetabolicN
        [Plantain].Stem.Live.StructuralWt
        [Plantain].Stem.Live.NonStructuralWt
        [Plantain].Stem.Live.MetabolicWt
        [Plantain].Stem.Live.StructuralN
        [Plantain].Stem.Live.NonStructuralN
        [Plantain].Inflorescence.Live.StructuralWt
        [Plantain].Inflorescence.Live.NonStructuralWt
        [Plantain].Inflorescence.Live.StructuralN
        [Plantain].Inflorescence.Live.NonStructuralN
        [Plantain].Root.Live.StructuralWt
        [Plantain].Root.Live.NonStructuralWt
        [Plantain].Root.Live.StructuralN
        [Plantain].Root.Live.NonStructuralN
        [Plantain].Taproot.Live.StructuralWt
        [Plantain].Taproot.Live.NonStructuralWt
        [Plantain].Taproot.Live.StructuralN
        [Plantain].Taproot.Live.NonStructuralN
        [Plantain].Leaf.Live.StructuralNConc
        [Plantain].Leaf.Live.NonStructuralNConc
        [Plantain].Root.Live.StructuralNConc
        [Plantain].Root.Live.NonStructuralNConc
        [Plantain].Leaf.DMDemandFunction.PartitionFraction.Value()
        [Plantain].Stem.DMDemandFunction.PartitionFraction.Value()
        [Plantain].Inflorescence.DMDemandFunction.PartitionFraction.Value()
        [Plantain].Root.PartitionFraction.Value()
        [Plantain].Taproot.DMDemandFunction.PartitionFraction.Value()
        [Plantain].Leaf.Allocated.Wt
        [Plantain].Stem.Allocated.Wt
        [Plantain].Inflorescence.Allocated.Wt
        [Plantain].Taproot.Allocated.Wt
        [Plantain].Root.Allocated.Wt
        [Plantain].Leaf.Senesced.Wt
        [Plantain].Stem.Senesced.Wt
        [Plantain].Inflorescence.Senesced.Wt
        [Plantain].Taproot.Senesced.Wt
        [Plantain].Root.Senesced.Wt
        [Plantain].Leaf.Detached.Wt
        [Plantain].Stem.Detached.Wt
        [Plantain].Inflorescence.Detached.Wt
        [Plantain].Taproot.Detached.Wt
        [Plantain].Root.Detached.Wt
        [Plantain].Leaf.Removed.Wt
        [Plantain].Stem.Removed.Wt
        [Plantain].Inflorescence.Removed.Wt
        [Plantain].Taproot.Removed.Wt
        [Plantain].Root.Removed.Wt
  DataStore
    ExcelInput Observed: FileName=Observed.xlsx; SheetNames=[Observed]
    PredictedObserved: PredictedTableName=Report; ObservedTableName=Observed; FieldNameUsedForMatch=Date
  Folder Validation
    Folder New Zealand
      Experiment No1FarmFD902
        Memo
          This simulation setup was based on field trials performed at Massey University's No 1 Farm, in Palmerston North, New Zealand, between 2011 and 2012.  The experiment examined the effect of frequency of grazing (either 2 or 4 weeks) on herb pastures.  Dairy cows were allowed to graze the swards down to a residual height between 7-10cm.
          Observed data supplied by .

          The soil at the experimental site was a Manawatu silt loam (an Weathered Fluvial Recent soil; USDA: Dystric Fluventic Eutrochrept), the parameters required were inferred using data from the New Zealand National Soils Database (Landcare Research).
          Weather data was obtained from nearby Turitea weather station (NIWA).
        Factors
          Factor GrazeFrequency: Specifications=[Grazings]
            Operations 2wks
              2011-12-20  [Defoliate].Script.Defoliate(defoliationType: "Graze", amountDM: 40, amountType: "ResidualDM", duration: 1)
              2011-12-20  [Fertiliser].Apply(Amount: 10, Type: Fertiliser.Types.UreaN, Depth: 10)
              2012-01-05  [Defoliate].Script.Defoliate(defoliationType: "Graze", amountDM: 40, amountType: "ResidualDM", duration: 1)
              2012-01-05  [Fertiliser].Apply(Amount: 5, Type: Fertiliser.Types.UreaN, Depth: 10)
              2012-01-18  [Defoliate].Script.Defoliate(defoliationType: "Graze", amountDM: 40, amountType: "ResidualDM", duration: 1)
              2012-01-18  [Fertiliser].Apply(Amount: 5, Type: Fertiliser.Types.UreaN, Depth: 10)
              2012-02-01  [Defoliate].Script.Defoliate(defoliationType: "Graze", amountDM: 40, amountType: "ResidualDM", duration: 1)
              2012-02-01  [Fertiliser].Apply(Amount: 5, Type: Fertiliser.Types.UreaN, Depth: 10)
              2012-02-15  [Defoliate].Script.Defoliate(defoliationType: "Graze", amountDM: 40, amountType: "ResidualDM", duration: 1)
              2012-02-15  [Fertiliser].Apply(Amount: 5, Type: Fertiliser.Types.UreaN, Depth: 10)
              2012-02-29  [Defoliate].Script.Defoliate(defoliationType: "Graze", amountDM: 40, amountType: "ResidualDM", duration: 1)
              2012-02-29  [Fertiliser].Apply(Amount: 5, Type: Fertiliser.Types.UreaN, Depth: 10)
              2012-03-14  [Defoliate].Script.Defoliate(defoliationType: "Graze", amountDM: 40, amountType: "ResidualDM", duration: 1)
              2012-03-14  [Fertiliser].Apply(Amount: 5, Type: Fertiliser.Types.UreaN, Depth: 10)
              2012-03-28  [Defoliate].Script.Defoliate(defoliationType: "Graze", amountDM: 40, amountType: "ResidualDM", duration: 1)
              2012-03-28  [Fertiliser].Apply(Amount: 5, Type: Fertiliser.Types.UreaN, Depth: 10)
              2012-04-12  [Defoliate].Script.Defoliate(defoliationType: "Graze", amountDM: 40, amountType: "ResidualDM", duration: 1)
              2012-04-12  [Fertiliser].Apply(Amount: 5, Type: Fertiliser.Types.UreaN, Depth: 10)
              2012-04-26  [Defoliate].Script.Defoliate(defoliationType: "Graze", amountDM: 40, amountType: "ResidualDM", duration: 1)
              2012-04-26  [Fertiliser].Apply(Amount: 5, Type: Fertiliser.Types.UreaN, Depth: 10)
              2012-05-09  [Defoliate].Script.Defoliate(defoliationType: "Graze", amountDM: 40, amountType: "ResidualDM", duration: 1)
              2012-05-09  [Fertiliser].Apply(Amount: 5, Type: Fertiliser.Types.UreaN, Depth: 10)
            Operations 4wks
              2011-12-20  [Defoliate].Script.Defoliate(defoliationType: "Graze", amountDM: 40, amountType: "ResidualDM", duration: 1)
              2011-12-20  [Fertiliser].Apply(Amount: 10, Type: Fertiliser.Types.UreaN, Depth: 10)
              2012-01-18  [Defoliate].Script.Defoliate(defoliationType: "Graze", amountDM: 40, amountType: "ResidualDM", duration: 1)
              2012-01-18  [Fertiliser].Apply(Amount: 10, Type: Fertiliser.Types.UreaN, Depth: 10)
              2012-02-15  [Defoliate].Script.Defoliate(defoliationType: "Graze", amountDM: 40, amountType: "ResidualDM", duration: 1)
              2012-02-15  [Fertiliser].Apply(Amount: 10, Type: Fertiliser.Types.UreaN, Depth: 10)
              2012-03-14  [Defoliate].Script.Defoliate(defoliationType: "Graze", amountDM: 40, amountType: "ResidualDM", duration: 1)
              2012-03-14  [Fertiliser].Apply(Amount: 10, Type: Fertiliser.Types.UreaN, Depth: 10)
              2012-04-12  [Defoliate].Script.Defoliate(defoliationType: "Graze", amountDM: 40, amountType: "ResidualDM", duration: 1)
              2012-04-12  [Fertiliser].Apply(Amount: 10, Type: Fertiliser.Types.UreaN, Depth: 10)
              2012-05-09  [Defoliate].Script.Defoliate(defoliationType: "Graze", amountDM: 40, amountType: "ResidualDM", duration: 1)
              2012-05-09  [Fertiliser].Apply(Amount: 10, Type: Fertiliser.Types.UreaN, Depth: 10)
        Simulation No1FarmFD902
          Clock: StartDate=2011-10-01; EndDate=2012-06-30
          Weather: FileName=PalmerstonNorth.met
          Summary summaryfile
          SoilArbitrator Soil Arbitrator
          Zone Field: Area=1; Slope=0
            Folder Management
              Operations Sowing
                2011-10-10  [Plantain].Sow(population: 250, cultivar: "Tonic", depth: 10, rowSpacing: 150)
              Operations FertSchedule
                2011-11-15  [Fertiliser].Apply(Amount: 25, Type: Fertiliser.Types.UreaN, Depth: 10)
                2011-12-25  [Fertiliser].Apply(Amount: 25, Type: Fertiliser.Types.UreaN, Depth: 10)
                2012-01-25  [Fertiliser].Apply(Amount: 25, Type: Fertiliser.Types.UreaN, Depth: 10)
                2012-02-25  [Fertiliser].Apply(Amount: 25, Type: Fertiliser.Types.UreaN, Depth: 10)
                2012-03-25  [Fertiliser].Apply(Amount: 25, Type: Fertiliser.Types.UreaN, Depth: 10)
                2012-04-25  [Fertiliser].Apply(Amount: 25, Type: Fertiliser.Types.UreaN, Depth: 10)
              Manager Defoliate
                Message =
```csharp
using System;
using Models.Core;
using System.Collections.Generic;
using System.Text;
using Models;
using Models.Soils;
using Models.PMF;
using System.Xml.Serialization;
using APSIM.Shared.Utilities;

namespace Models
{
	[Serializable]
	public class Script : Model
	{
		[Description("This script is set in 'Replacements':")]
		public string Message { get; set; }
	}
}
```
              Operations Grazings
              Manager ExtraVariables
```csharp
// This will be replaced by the "ExtraVariables" section in "Replacements"

using System;
using Models.Core;

namespace Models
{
	[Serializable] 
	public class Script : Model
	{
	}
}
```
            MicroClimate: a_interception=0; b_interception=1; c_interception=0; d_interception=0; soil_albedo=0.23; sun_angle=15; soil_heat_flux_fraction=0.4; night_interception_fraction=0.5; refheight=2; albedo=0.15; emissivity=0.96; RadIntTotal=0
            Irrigation
            Fertiliser
            SurfaceOrganicMatter: PoolName=grass; type=grass; mass=500; standing_fraction=0; cnr=40; CriticalResidueWeight=2000; OptimumDecompTemp=20; MaxCumulativeEOS=20; CNRatioDecompCoeff=0.277; CNRatioDecompThreshold=25; TotalLeachRain=25; MinRainToLeach=10; CriticalMinimumOrganicC=0.004; DefaultCPRatio=0; DefaultStandingFraction=0; StandingExtinctCoeff=0.5; FractionFaecesAdded=0.5
              Pools:
                {PoolName=grass, ResidueType=grass, Mass=500, CNRatio=40, StandingFraction=0}
              ResidueTypes ResidueTypesList: LoadFromResource=ResidueTypes
            Soil ManawatuSoil: LocalName=Manawatu silt loam; Site=Massey No 1; NearestTown=Palmerston North; Region=Manawatu; Country=New Zealand; Latitude=0; Longitude=0; DataSource=Based primarily on data from NZ-NSD
              SoilType=Dystric Fluventic Eutrochrept (US), Weathered Fluvial Recent Soil (NZ)
              Analysis: PHUnits=Water; BoronUnits=HotWater
                Thickness  Rocks  PH  CEC   ParticleSizeSand  ParticleSizeSilt  ParticleSizeClay
                100        0      6   12.2  14                74                12
                100        0      6   10.9  13                73                14
                200        0      6   10.7  5                 76.5              18.5
                300        0      6   6.3   43                43                14
                250        0      6   6     45                42                13
                250        0      6   8.4   18                69                13
                300        0      6   9.55  12.5              68.5              19
              Water
                Thickness  BD      AirDry  LL15   DUL    SAT    KS
                100        1.171   0.04    0.11   0.3    0.43   2014.6
                100        1.248   0.15    0.15   0.3    0.47   900
                200        1.325   0.17    0.165  0.315  0.465  283.3
                300        1.433   0.07    0.07   0.17   0.38   1311.8
                250        1.411   0.06    0.06   0.21   0.38   1609.1
                250        1.439   0.08    0.08   0.25   0.37   335.2
                300        1.3685  0.1     0.095  0.265  0.395  219
                SoilCrop PlantainSoil: LL=[0.11, 0.15, 0.17, 0.07, 0.06, 0.08, 0.1]; KL=[0.1, 0.08, 0.05, 0.02, 0.01, 0.01, 0]; XF=[1, 1, 1, 1, 1, 1, 1]
              SoilWater: SummerDate=21-Sep; SummerU=6; SummerCona=3.5; WinterDate=23-Mar; WinterU=6; WinterCona=2.5; DiffusConst=88; DiffusSlope=35; Salb=0.2; CN2Bare=0.7; CNRed=20; CNCov=0.8; max_pond=0; Thickness=[100, 100, 200, 300, 250, 250, 300]; SWCON=[0.55, 0.6, 0.7, 0.7, 0.75, 0.8, 0.8]; residueinterception=0
              SoilNitrogen: fom_type=[default, manure, mucuna, lablab, shemp, stable]; fract_carb=[0.2, 0.3, 0.54, 0.57, 0.45, 0]; fract_cell=[0.7, 0.3, 0.37, 0.37, 0.47, 0.1]; fract_lign=[0.1, 0.4, 0.09, 0.06, 0.08, 0.9]; wfpsN2N2O_x=[22, 88]; wfpsN2N2O_y=[0.1, 1]
              SoilOrganicMatter: RootCN=40; RootWt=1000; SoilCN=12.5; EnrACoeff=7.4; EnrBCoeff=0.2; OCUnits=Total
                Thickness  OC    FBiom  FInert
                100        3.75  0.08   0.57
                100        1.9   0.04   0.6
                200        0.9   0.02   0.62
                300        0.27  0.01   0.65
                250        0.2   0.01   0.7
                250        0.26  0.01   0.8
                300        0.29  0.01   0.85
              InitialWater Initial water: PercentMethod=EvenlyDistributed; FractionFull=0.9
              Sample Initial nitrogen: NO3Units=kgha; NH4Units=kgha; SWUnits=Volumetric; OCUnits=Total; PHUnits=Water
                Thickness  NO3  NH4
                200        25   1
                200        25   0.5
                600        30   0.5
                500        5    0.5
              CERESSoilTemperature
            Plant Plantain: CropType=Plantain
            Report: EventNames=[Clock].DoReport
            SoluteManager
      Experiment ScottFarmFD902
        Memo
          This simulation was setup based on observed data from a defoliation trial at Scott farm, Hamilton, New Zealand, run from 2010 to 2012.  The study investigated the effect of cut height (i.e. rotation length) and residual height on plantain growth.  The treatments consisted of trigerring cuts when the sward reached heights of approximatelly 150, 250, 350, and 450 mm, in factorial combination with two residual heights, 30-50 or 60-80 mm.  Harvest was avoided over winter.
          Trial plots were sown with plantain, cultivar '*Ceres Tonic*' (10.0 kg/ha), after previous pasture was sprayed with herbicide and conventionally drilled.  Irrigation was applied in the first year and fertiliser was applied over summer.  Results reported include yield, botanical composition, plant density, leaf area and light interception (the later two only during one growing period - between two cuts).

          References:
          Lee, J.M.;  Hemmingson, N.R.; Minnee, E.M.K.; Clark, C.E.F. 2015. Management strategies for chicory (Cichorium intybus) and plantain (Plantago lanceolata): impact on dry matter yield, nutritive characteristics and plant density. Crop and Pasture Science, 66, 168–183.
        Factors
          Factor Defoliation: Specifications=[DefoliationSchedule]
            Operations 15To4
              2010-12-20  [Defoliate].Script.Defoliate(defoliationType: "Cut", amountDM: 35, amountType: "ResidualDM", duration: 1)
              2011-01-13  [Defoliate].Script.Defoliate(defoliationType: "Cut", amountDM: 35, amountType: "ResidualDM", duration: 1)
              2011-01-20  [Defoliate].Script.Defoliate(defoliationType: "Cut", amountDM: 35, amountType: "ResidualDM", duration: 1)
              2011-01-27  [Defoliate].Script.Defoliate(defoliationType: "Cut", amountDM: 35, amountType: "ResidualDM", duration: 1)
              2011-02-10  [Defoliate].Script.Defoliate(defoliationType: "Cut", amountDM: 35, amountType: "ResidualDM", duration: 1)
              2011-02-16  [Defoliate].Script.Defoliate(defoliationType: "Cut", amountDM: 35, amountType: "ResidualDM", duration: 1)
              2011-03-03  [Defoliate].Script.Defoliate(defoliationType: "Cut", amountDM: 35, amountType: "ResidualDM", duration: 1)
              2011-03-17  [Defoliate].Script.Defoliate(defoliationType: "Cut", amountDM: 35, amountType: "ResidualDM", duration: 1)
              2011-03-24  [Defoliate].Script.Defoliate(defoliationType: "Cut", amountDM: 45, amountType: "ResidualDM", duration: 1)
              2011-04-07  [Defoliate].Script.Defoliate(defoliationType: "Cut", amountDM: 45, amountType: "ResidualDM", duration: 1)
              2011-04-21  [Defoliate].Script.Defoliate(defoliationType: "Cut", amountDM: 45, amountType: "ResidualDM", duration: 1)
              2011-05-05  [Defoliate].Script.Defoliate(defoliationType: "Cut", amountDM: 45, amountType: "ResidualDM", duration: 1)
              2011-05-18  [Defoliate].Script.Defoliate(defoliationType: "Cut", amountDM: 45, amountType: "ResidualDM", duration: 1)
              2011-10-06  [Defoliate].Script.Defoliate(defoliationType: "Cut", amountDM: 45, amountType: "ResidualDM", duration: 1)
              2011-10-20  [Defoliate].Script.Defoliate(defoliationType: "Cut", amountDM: 45, amountType: "ResidualDM", duration: 1)
              2011-11-03  [Defoliate].Script.Defoliate(defoliationType: "Cut", amountDM: 45, amountType: "ResidualDM", duration: 1)
              2011-11-17  [Defoliate].Script.Defoliate(defoliationType: "Cut", amountDM: 45, amountType: "ResidualDM", duration: 1)
              2011-12-08  [Defoliate].Script.Defoliate(defoliationType: "Cut", amountDM: 45, amountType: "ResidualDM", duration: 1)
              2011-12-22  [Defoliate].Script.Defoliate(defoliationType: "Cut", amountDM: 45, amountType: "ResidualDM", duration: 1)
              2012-01-12  [Defoliate].Script.Defoliate(defoliationType: "Cut", amountDM: 45, amountType: "ResidualDM", duration: 1)
              2012-01-26  [Defoliate].Script.Defoliate(defoliationType: "Cut", amountDM: 45, amountType: "ResidualDM", duration: 1)
              2012-02-16  [Defoliate].Script.Defoliate(defoliationType: "Cut", amountDM: 45, amountType: "ResidualDM", duration: 1)
              2012-03-09  [Defoliate].Script.Defoliate(defoliationType: "Cut", amountDM: 45, amountType: "ResidualDM", duration: 1)
              2012-03-29  [Defoliate].Script.Defoliate(defoliationType: "Cut", amountDM: 45, amountType: "ResidualDM", duration: 1)
              2012-04-19  [Defoliate].Script.Defoliate(defoliationType: "Cut", amountDM: 45, amountType: "ResidualDM", duration: 1)
              2012-05-17  [Defoliate].Script.Defoliate(defoliationType: "Cut", amountDM: 45, amountType: "ResidualDM", duration: 1)
            Operations 15To7
              2010-12-20  [Defoliate].Script.Defoliate(defoliationType: "Cut", amountDM: 50, amountType: "ResidualDM", duration: 1)
              2011-01-13  [Defoliate].Script.Defoliate(defoliationType: "Cut", amountDM: 50, amountType: "ResidualDM", duration: 1)
              2011-01-20  [Defoliate].Script.Defoliate(defoliationType: "Cut", amountDM: 50, amountType: "ResidualDM", duration: 1)
              2011-01-27  [Defoliate].Script.Defoliate(defoliationType: "Cut", amountDM: 50, amountType: "ResidualDM", duration: 1)
              2011-02-03  [Defoliate].Script.Defoliate(defoliationType: "Cut", amountDM: 50, amountType: "ResidualDM", duration: 1)
              2011-02-10  [Defoliate].Script.Defoliate(defoliationType: "Cut", amountDM: 50, amountType: "ResidualDM", duration: 1)
              2011-02-16  [Defoliate].Script.Defoliate(defoliationType: "Cut", amountDM: 50, amountType: "ResidualDM", duration: 1)
              2011-03-03  [Defoliate].Script.Defoliate(defoliationType: "Cut", amountDM: 50, amountType: "ResidualDM", duration: 1)
              2011-03-17  [Defoliate].Script.Defoliate(defoliationType: "Cut", amountDM: 50, amountType: "ResidualDM", duration: 1)
              2011-03-24  [Defoliate].Script.Defoliate(defoliationType: "Cut", amountDM: 60, amountType: "ResidualDM", duration: 1)
              2011-04-07  [Defoliate].Script.Defoliate(defoliationType: "Cut", amountDM: 60, amountType: "ResidualDM", duration: 1)
              2011-04-21  [Defoliate].Script.Defoliate(defoliationType: "Cut", amountDM: 60, amountType: "ResidualDM", duration: 1)
              2011-05-05  [Defoliate].Script.Defoliate(defoliationType: "Cut", amountDM: 60, amountType: "ResidualDM", duration: 1)
              2011-05-18  [Defoliate].Script.Defoliate(defoliationType: "Cut", amountDM: 60, amountType: "ResidualDM", duration: 1)
              2011-10-06  [Defoliate].Script.Defoliate(defoliationType: "Cut", amountDM: 60, amountType: "ResidualDM", duration: 1)
              2011-10-20  [Defoliate].Script.Defoliate(defoliationType: "Cut", amountDM: 60, amountType: "ResidualDM", duration: 1)
              2011-11-03  [Defoliate].Script.Defoliate(defoliationType: "Cut", amountDM: 60, amountType: "ResidualDM", duration: 1)
              2011-11-17  [Defoliate].Script.Defoliate(defoliationType: "Cut", amountDM: 60, amountType: "ResidualDM", duration: 1)
              2011-12-08  [Defoliate].Script.Defoliate(defoliationType: "Cut", amountDM: 60, amountType: "ResidualDM", duration: 1)
              2011-12-22  [Defoliate].Script.Defoliate(defoliationType: "Cut", amountDM: 60, amountType: "ResidualDM", duration: 1)
              2012-01-12  [Defoliate].Script.Defoliate(defoliationType: "Cut", amountDM: 60, amountType: "ResidualDM", duration: 1)
              2012-01-26  [Defoliate].Script.Defoliate(defoliationType: "Cut", amountDM: 60, amountType: "ResidualDM", duration: 1)
              2012-02-16  [Defoliate].Script.Defoliate(defoliationType: "Cut", amountDM: 60, amountType: "ResidualDM", duration: 1)
              2012-03-09  [Defoliate].Script.Defoliate(defoliationType: "Cut", amountDM: 60, amountType: "ResidualDM", duration: 1)
              2012-03-29  [Defoliate].Script.Defoliate(defoliationType: "Cut", amountDM: 60, amountType: "ResidualDM", duration: 1)
              2012-04-19  [Defoliate].Script.Defoliate(defoliationType: "Cut", amountDM: 60, amountType: "ResidualDM", duration: 1)
              2012-05-17  [Defoliate].Script.Defoliate(defoliationType: "Cut", amountDM: 60, amountType: "ResidualDM", duration: 1)
            Operations 25To4
              2010-12-20  [Defoliate].Script.Defoliate(defoliationType: "Cut", amountDM: 35, amountType: "ResidualDM", duration: 1)
              2011-01-13  [Defoliate].Script.Defoliate(defoliationType: "Cut", amountDM: 35, amountType: "ResidualDM", duration: 1)
              2011-01-27  [Defoliate].Script.Defoliate(defoliationType: "Cut", amountDM: 35, amountType: "ResidualDM", duration: 1)
              2011-02-10  [Defoliate].Script.Defoliate(defoliationType: "Cut", amountDM: 35, amountType: "ResidualDM", duration: 1)
              2011-02-24  [Defoliate].Script.Defoliate(defoliationType: "Cut", amountDM: 35, amountType: "ResidualDM", duration: 1)
              2011-03-10  [Defoliate].Script.Defoliate(defoliationType: "Cut", amountDM: 35, amountType: "ResidualDM", duration: 1)
              2011-03-24  [Defoliate].Script.Defoliate(defoliationType: "Cut", amountDM: 45, amountType: "ResidualDM", duration: 1)
              2011-04-14  [Defoliate].Script.Defoliate(defoliationType: "Cut", amountDM: 45, amountType: "ResidualDM", duration: 1)
              2011-05-18  [Defoliate].Script.Defoliate(defoliationType: "Cut", amountDM: 45, amountType: "ResidualDM", duration: 1)
              2011-10-13  [Defoliate].Script.Defoliate(defoliationType: "Cut", amountDM: 45, amountType: "ResidualDM", duration: 1)
              2011-10-27  [Defoliate].Script.Defoliate(defoliationType: "Cut", amountDM: 45, amountType: "ResidualDM", duration: 1)
              2011-11-10  [Defoliate].Script.Defoliate(defoliationType: "Cut", amountDM: 45, amountType: "ResidualDM", duration: 1)
              2011-12-08  [Defoliate].Script.Defoliate(defoliationType: "Cut", amountDM: 45, amountType: "ResidualDM", duration: 1)
              2012-01-05  [Defoliate].Script.Defoliate(defoliationType: "Cut", amountDM: 45, amountType: "ResidualDM", duration: 1)
              2012-01-26  [Defoliate].Script.Defoliate(defoliationType: "Cut", amountDM: 45, amountType: "ResidualDM", duration: 1)
              2012-02-16  [Defoliate].Script.Defoliate(defoliationType: "Cut", amountDM: 45, amountType: "ResidualDM", duration: 1)
              2012-03-09  [Defoliate].Script.Defoliate(defoliationType: "Cut", amountDM: 45, amountType: "ResidualDM", duration: 1)
              2012-03-29  [Defoliate].Script.Defoliate(defoliationType: "Cut", amountDM: 45, amountType: "ResidualDM", duration: 1)
              2012-05-03  [Defoliate].Script.Defoliate(defoliationType: "Cut", amountDM: 45, amountType: "ResidualDM", duration: 1)
              2012-05-24  [Defoliate].Script.Defoliate(defoliationType: "Cut", amountDM: 45, amountType: "ResidualDM", duration: 1)
            Operations 25To7
              2010-12-20  [Defoliate].Script.Defoliate(defoliationType: "Cut", amountDM: 50, amountType:"ResidualDM", duration: 1)
              2011-01-13  [Defoliate].Script.Defoliate(defoliationType: "Cut", amountDM: 50, amountType:"ResidualDM", duration: 1)
              2011-01-27  [Defoliate].Script.Defoliate(defoliationType: "Cut", amountDM: 50, amountType:"ResidualDM", duration: 1)
              2011-02-10  [Defoliate].Script.Defoliate(defoliationType: "Cut", amountDM: 50, amountType:"ResidualDM", duration: 1)
              2011-02-24  [Defoliate].Script.Defoliate(defoliationType: "Cut", amountDM: 50, amountType:"ResidualDM", duration: 1)
              2011-03-10  [Defoliate].Script.Defoliate(defoliationType: "Cut", amountDM: 50, amountType:"ResidualDM", duration: 1)
              2011-03-24  [Defoliate].Script.Defoliate(defoliationType: "Cut", amountDM: 60, amountType:"ResidualDM", duration: 1)
              2011-04-14  [Defoliate].Script.Defoliate(defoliationType: "Cut", amountDM: 60, amountType:"ResidualDM", duration: 1)
              2011-05-18  [Defoliate].Script.Defoliate(defoliationType: "Cut", amountDM: 60, amountType:"ResidualDM", duration: 1)
              2011-10-13  [Defoliate].Script.Defoliate(defoliationType: "Cut", amountDM: 60, amountType:"ResidualDM", duration: 1)
              2011-10-27  [Defoliate].Script.Defoliate(defoliationType: "Cut", amountDM: 60, amountType:"ResidualDM", duration: 1)
              2011-11-10  [Defoliate].Script.Defoliate(defoliationType: "Cut", amountDM: 60, amountType:"ResidualDM", duration: 1)
              2011-12-08  [Defoliate].Script.Defoliate(defoliationType: "Cut", amountDM: 60, amountType:"ResidualDM", duration: 1)
              2012-01-05  [Defoliate].Script.Defoliate(defoliationType: "Cut", amountDM: 60, amountType:"ResidualDM", duration: 1)
              2012-01-26  [Defoliate].Script.Defoliate(defoliationType: "Cut", amountDM: 60, amountType:"ResidualDM", duration: 1)
              2012-02-16  [Defoliate].Script.Defoliate(defoliationType: "Cut", amountDM: 60, amountType:"ResidualDM", duration: 1)
              2012-03-09  [Defoliate].Script.Defoliate(defoliationType: "Cut", amountDM: 60, amountType:"ResidualDM", duration: 1)
              2012-03-29  [Defoliate].Script.Defoliate(defoliationType: "Cut", amountDM: 60, amountType:"ResidualDM", duration: 1)
              2012-05-03  [Defoliate].Script.Defoliate(defoliationType: "Cut", amountDM: 60, amountType:"ResidualDM", duration: 1)
              2012-05-24  [Defoliate].Script.Defoliate(defoliationType: "Cut", amountDM: 60, amountType:"ResidualDM", duration: 1)
            Operations 35To4
              2010-12-20  [Defoliate].Script.Defoliate(defoliationType: "Cut", amountDM: 35, amountType: "ResidualDM", duration: 1)
              2011-01-13  [Defoliate].Script.Defoliate(defoliationType: "Cut", amountDM: 35, amountType: "ResidualDM", duration: 1)
              2011-02-03  [Defoliate].Script.Defoliate(defoliationType: "Cut", amountDM: 35, amountType: "ResidualDM", duration: 1)
              2011-02-24  [Defoliate].Script.Defoliate(defoliationType: "Cut", amountDM: 35, amountType: "ResidualDM", duration: 1)
              2011-03-17  [Defoliate].Script.Defoliate(defoliationType: "Cut", amountDM: 35, amountType: "ResidualDM", duration: 1)
              2011-04-14  [Defoliate].Script.Defoliate(defoliationType: "Cut", amountDM: 45, amountType: "ResidualDM", duration: 1)
              2011-05-18  [Defoliate].Script.Defoliate(defoliationType: "Cut", amountDM: 45, amountType: "ResidualDM", duration: 1)
              2011-10-20  [Defoliate].Script.Defoliate(defoliationType: "Cut", amountDM: 45, amountType: "ResidualDM", duration: 1)
              2011-11-10  [Defoliate].Script.Defoliate(defoliationType: "Cut", amountDM: 45, amountType: "ResidualDM", duration: 1)
              2011-12-15  [Defoliate].Script.Defoliate(defoliationType: "Cut", amountDM: 45, amountType: "ResidualDM", duration: 1)
              2012-01-19  [Defoliate].Script.Defoliate(defoliationType: "Cut", amountDM: 45, amountType: "ResidualDM", duration: 1)
              2012-02-24  [Defoliate].Script.Defoliate(defoliationType: "Cut", amountDM: 45, amountType: "ResidualDM", duration: 1)
              2012-04-05  [Defoliate].Script.Defoliate(defoliationType: "Cut", amountDM: 45, amountType: "ResidualDM", duration: 1)
              2012-05-24  [Defoliate].Script.Defoliate(defoliationType: "Cut", amountDM: 45, amountType: "ResidualDM", duration: 1)
            Operations 35To7
              2010-12-20  [Defoliate].Script.Defoliate(defoliationType: "Cut", amountDM: 50, amountType: "ResidualDM", duration: 1)
              2011-01-13  [Defoliate].Script.Defoliate(defoliationType: "Cut", amountDM: 50, amountType: "ResidualDM", duration: 1)
              2011-02-03  [Defoliate].Script.Defoliate(defoliationType: "Cut", amountDM: 50, amountType: "ResidualDM", duration: 1)
              2011-02-24  [Defoliate].Script.Defoliate(defoliationType: "Cut", amountDM: 50, amountType: "ResidualDM", duration: 1)
              2011-03-17  [Defoliate].Script.Defoliate(defoliationType: "Cut", amountDM: 50, amountType: "ResidualDM", duration: 1)
              2011-04-14  [Defoliate].Script.Defoliate(defoliationType: "Cut", amountDM: 60, amountType: "ResidualDM", duration: 1)
              2011-05-18  [Defoliate].Script.Defoliate(defoliationType: "Cut", amountDM: 60, amountType: "ResidualDM", duration: 1)
              2011-10-20  [Defoliate].Script.Defoliate(defoliationType: "Cut", amountDM: 60, amountType: "ResidualDM", duration: 1)
              2011-11-10  [Defoliate].Script.Defoliate(defoliationType: "Cut", amountDM: 60, amountType: "ResidualDM", duration: 1)
              2011-12-15  [Defoliate].Script.Defoliate(defoliationType: "Cut", amountDM: 60, amountType: "ResidualDM", duration: 1)
              2012-01-19  [Defoliate].Script.Defoliate(defoliationType: "Cut", amountDM: 60, amountType: "ResidualDM", duration: 1)
              2012-02-24  [Defoliate].Script.Defoliate(defoliationType: "Cut", amountDM: 60, amountType: "ResidualDM", duration: 1)
              2012-04-05  [Defoliate].Script.Defoliate(defoliationType: "Cut", amountDM: 60, amountType: "ResidualDM", duration: 1)
              2012-05-24  [Defoliate].Script.Defoliate(defoliationType: "Cut", amountDM: 60, amountType: "ResidualDM", duration: 1)
            Operations 55To4
              2010-12-20  [Defoliate].Script.Defoliate(defoliationType: "Cut", amountDM: 35, amountType: "ResidualDM", duration: 1)
              2011-01-13  [Defoliate].Script.Defoliate(defoliationType: "Cut", amountDM: 35, amountType: "ResidualDM", duration: 1)
              2011-02-16  [Defoliate].Script.Defoliate(defoliationType: "Cut", amountDM: 35, amountType: "ResidualDM", duration: 1)
              2011-03-31  [Defoliate].Script.Defoliate(defoliationType: "Cut", amountDM: 45, amountType: "ResidualDM", duration: 1)
              2011-05-18  [Defoliate].Script.Defoliate(defoliationType: "Cut", amountDM: 45, amountType: "ResidualDM", duration: 1)
              2011-10-27  [Defoliate].Script.Defoliate(defoliationType: "Cut", amountDM: 45, amountType: "ResidualDM", duration: 1)
              2011-12-15  [Defoliate].Script.Defoliate(defoliationType: "Cut", amountDM: 45, amountType: "ResidualDM", duration: 1)
              2012-01-19  [Defoliate].Script.Defoliate(defoliationType: "Cut", amountDM: 45, amountType: "ResidualDM", duration: 1)
              2012-02-24  [Defoliate].Script.Defoliate(defoliationType: "Cut", amountDM: 45, amountType: "ResidualDM", duration: 1)
              2012-04-12  [Defoliate].Script.Defoliate(defoliationType: "Cut", amountDM: 45, amountType: "ResidualDM", duration: 1)
              2012-05-24  [Defoliate].Script.Defoliate(defoliationType: "Cut", amountDM: 45, amountType: "ResidualDM", duration: 1)
            Operations 55To7
              2010-12-20  [Defoliate].Script.Defoliate(defoliationType: "Cut", amountDM: 50, amountType: "ResidualDM", duration: 1)
              2011-01-13  [Defoliate].Script.Defoliate(defoliationType: "Cut", amountDM: 50, amountType: "ResidualDM", duration: 1)
              2011-02-16  [Defoliate].Script.Defoliate(defoliationType: "Cut", amountDM: 50, amountType: "ResidualDM", duration: 1)
              2011-03-31  [Defoliate].Script.Defoliate(defoliationType: "Cut", amountDM: 60, amountType: "ResidualDM", duration: 1)
              2011-05-18  [Defoliate].Script.Defoliate(defoliationType: "Cut", amountDM: 60, amountType: "ResidualDM", duration: 1)
              2011-10-27  [Defoliate].Script.Defoliate(defoliationType: "Cut", amountDM: 60, amountType: "ResidualDM", duration: 1)
              2011-12-15  [Defoliate].Script.Defoliate(defoliationType: "Cut", amountDM: 60, amountType: "ResidualDM", duration: 1)
              2012-01-19  [Defoliate].Script.Defoliate(defoliationType: "Cut", amountDM: 60, amountType: "ResidualDM", duration: 1)
              2012-02-24  [Defoliate].Script.Defoliate(defoliationType: "Cut", amountDM: 60, amountType: "ResidualDM", duration: 1)
              2012-04-12  [Defoliate].Script.Defoliate(defoliationType: "Cut", amountDM: 60, amountType: "ResidualDM", duration: 1)
              2012-05-24  [Defoliate].Script.Defoliate(defoliationType: "Cut", amountDM: 60, amountType: "ResidualDM", duration: 1)
        Simulation FD902
          Clock: StartDate=2010-10-01; EndDate=2012-06-30
          Weather: FileName=Ruakura.met
          Summary summaryfile
          SoilArbitrator Soil Arbitrator
          Zone Field: Area=1; Slope=0
            Folder Management
              Operations Sowing
                2010-10-13  [Plantain].Sow(population: 200, cultivar: "Tonic", depth: 10, rowSpacing: 150)
              Operations DefoliationSchedule
              Operations FertiliserSchedule
                2010-10-05  [Fertiliser].Apply(Amount: 30, Type: Fertiliser.Types.UreaN, Depth: 50)
                2011-12-15  [Fertiliser].Apply(Amount: 39, Type: Fertiliser.Types.UreaN, Depth: 10)
                2012-01-19  [Fertiliser].Apply(Amount: 39, Type: Fertiliser.Types.UreaN, Depth: 10)
                2012-02-23  [Fertiliser].Apply(Amount: 39, Type: Fertiliser.Types.UreaN, Depth: 10)
                2012-03-29  [Fertiliser].Apply(Amount: 39, Type: Fertiliser.Types.UreaN, Depth: 10)
                2012-05-03  [Fertiliser].Apply(Amount: 39, Type: Fertiliser.Types.UreaN, Depth: 10)
                2012-11-15  [Fertiliser].Apply(Amount: 28, Type: Fertiliser.Types.UreaN, Depth: 10)
                2012-12-20  [Fertiliser].Apply(Amount: 28, Type: Fertiliser.Types.UreaN, Depth: 10)
                2013-01-27  [Fertiliser].Apply(Amount: 28, Type: Fertiliser.Types.UreaN, Depth: 10)
                2013-03-10  [Fertiliser].Apply(Amount: 28, Type: Fertiliser.Types.UreaN, Depth: 10)
              Operations IrrigationSchedule
                2010-11-30  [Irrigation].Apply(amount: 25.4)
                2010-12-10  [Irrigation].Apply(amount: 25.2)
                2010-12-14  [Irrigation].Apply(amount: 9.2)
                2010-12-15  [Irrigation].Apply(amount: 29.8)
                2011-01-05  [Irrigation].Apply(amount: 41.2)
                2011-02-01  [Irrigation].Apply(amount: 55)
                2011-02-04  [Irrigation].Apply(amount: 13.7)
                2011-02-11  [Irrigation].Apply(amount: 36.6)
                2011-02-23  [Irrigation].Apply(amount: 18.3)
                2011-03-04  [Irrigation].Apply(amount: 36.6)
                2011-03-13  [Irrigation].Apply(amount: 4.6)
                2011-03-17  [Irrigation].Apply(amount: 36.6)
                2011-11-30  [Irrigation].Apply(amount: 36.6)
              Manager Defoliate: same as Validation.New Zealand.No1FarmFD902.No1FarmFD902.Field.Management.Defoliate
              Manager ExtraVariables
                script: same as in Validation.New Zealand.No1FarmFD902.No1FarmFD902.Field.Management.ExtraVariables
            MicroClimate: a_interception=0; b_interception=1; c_interception=0; d_interception=0; soil_albedo=0.23; sun_angle=15; soil_heat_flux_fraction=0.4; night_interception_fraction=0.5; refheight=2; albedo=0.15; emissivity=0.96; RadIntTotal=0
            Irrigation
            Fertiliser
            SurfaceOrganicMatter: same as Validation.New Zealand.No1FarmFD902.No1FarmFD902.Field.SurfaceOrganicMatter
            Soil HorotiuSoil: SoilType=Typic Udivitrand (US), Typic Orthic Allophanic Soil (NZ); LocalName=Horotiu silt loam; Site=Ruakura; NearestTown=Hamilton; Region=Waikato; Country=New Zealand; Latitude=0; Longitude=0; DataSource=Based primarily on data from Close et al, 2003
              Analysis: PHUnits=Water; BoronUnits=HotWater
                Thickness  Rocks  PH  CEC   ParticleSizeSand  ParticleSizeSilt  ParticleSizeClay
                200        0      6   23.1  47                33                20
                200        0      6   17.2  65                17                19
                130        2      6   12.4  76                13                11
                140        5      6   10    84                10                7
                380        5      6   7.2   88                8                 5
                230        19     6   3.1   91                6                 3
                220        33     6   1.6   94                5                 1
              Water
                Thickness  BD    AirDry  LL15   DUL    SAT    KS
                200        0.88  0.114   0.228  0.373  0.581  553
                200        0.85  0.209   0.22   0.34   0.609  5083
                130        1.03  0.182   0.182  0.323  0.54   8353
                140        1.11  0.15    0.15   0.282  0.5    13589
                380        1.11  0.142   0.142  0.2    0.5    38963
                230        1.03  0.103   0.103  0.16   0.446  45280
                220        1.03  0.084   0.084  0.13   0.37   53606
                SoilCrop PlantainSoil: LL=[0.23, 0.22, 0.18, 0.15, 0.14, 0.1, 0.08]; KL=[0.1, 0.08, 0.05, 0.02, 0.01, 0.01, 0]; XF=[1, 1, 1, 1, 1, 1, 0.5]
              SoilWater: SummerDate=21-Sep; SummerU=6; SummerCona=3.5; WinterDate=23-Mar; WinterU=6; WinterCona=2.5; DiffusConst=88; DiffusSlope=35; Salb=0.2; CN2Bare=0.7; CNRed=20; CNCov=0.8; max_pond=0; Thickness=[200, 200, 130, 140, 380, 230, 220]; SWCON=[0.55, 0.6, 0.7, 0.7, 0.75, 0.8, 0.8]; residueinterception=0
              SoilNitrogen: fom_type=[default, manure, mucuna, lablab, shemp, stable]; fract_carb=[0.2, 0.3, 0.54, 0.57, 0.45, 0]; fract_cell=[0.7, 0.3, 0.37, 0.37, 0.47, 0.1]; fract_lign=[0.1, 0.4, 0.09, 0.06, 0.08, 0.9]; wfpsN2N2O_x=[22, 88]; wfpsN2N2O_y=[0.1, 1]
              SoilOrganicMatter: RootCN=40; RootWt=1000; SoilCN=12.5; EnrACoeff=7.4; EnrBCoeff=0.2; OCUnits=Total
                Thickness  OC    FBiom  FInert
                200        8     0.08   0.57
                200        1.88  0.04   0.6
                130        0.93  0.02   0.62
                140        0.43  0.01   0.65
                380        0.13  0.01   0.7
                230        0.1   0.01   0.8
                220        0.07  0.01   0.85
              InitialWater Initial water: PercentMethod=EvenlyDistributed; FractionFull=0.9
              Sample Initial nitrogen: NO3Units=ppm; NH4Units=ppm; SWUnits=Volumetric; OCUnits=Total; PHUnits=Water
                Thickness  NO3  NH4
                200        15   0.5
                200        10   0.2
                600        5    0.093
                500        1    0.093
              CERESSoilTemperature
            Plant Plantain: CropType=Plantain
            Report: EventNames=[Clock].DoReport
            SoluteManager
      Experiment FRNLLincoln
        Memo
          Simulation setup based on field trial performed at Lincoln University Research Dairy Farm, New Zealand, between 2014 and 2016.  The experiment was part of the FRNL (Forages for Reduced Nitrogen Leaching) program and the data is basically unpublished (references will be added when this come about).  Here only plots with pure plantain are used.
          The experiment consisted of six fertiliser treatments (N rates of 0, 50, 100, 200, 350 and 500 kg/ha/yr) in four replicates, and measurements comprised yield and quality indicators (here N content is used).
          Data supplyed by Grant Edwards, Lincoln University.

          The soil at the experimental site was a Templeton fine sandy loam (an Immature Pallic soil, USDA: Udic Haplustept), the required parameters were inferred based on data from the New Zealand National Soils Database (Landcare Research).
          Weather data was obtained from nearby Broadfields weather station (NIWA).
        Factors
          Factor NRate: Specifications=[NRate]
            Operations 0
            Operations 50
              2014-10-08  [Fertiliser].Apply(Amount: 5, Type: Fertiliser.Types.UreaN, Depth: 10)
              2014-10-31  [Fertiliser].Apply(Amount: 5, Type: Fertiliser.Types.UreaN, Depth: 10)
              2014-11-26  [Fertiliser].Apply(Amount: 5, Type: Fertiliser.Types.UreaN, Depth: 10)
              2014-12-17  [Fertiliser].Apply(Amount: 5, Type: Fertiliser.Types.UreaN, Depth: 10)
              2015-01-20  [Fertiliser].Apply(Amount: 5, Type: Fertiliser.Types.UreaN, Depth: 10)
              2015-02-12  [Fertiliser].Apply(Amount: 5, Type: Fertiliser.Types.UreaN, Depth: 10)
              2015-03-10  [Fertiliser].Apply(Amount: 5, Type: Fertiliser.Types.UreaN, Depth: 10)
              2015-04-17  [Fertiliser].Apply(Amount: 5, Type: Fertiliser.Types.UreaN, Depth: 10)
              2015-05-20  [Fertiliser].Apply(Amount: 5, Type: Fertiliser.Types.UreaN, Depth: 10)
              2015-09-09  [Fertiliser].Apply(Amount: 5, Type: Fertiliser.Types.UreaN, Depth: 10)
              2015-10-06  [Fertiliser].Apply(Amount: 5, Type: Fertiliser.Types.UreaN, Depth: 10)
              2015-11-06  [Fertiliser].Apply(Amount: 5, Type: Fertiliser.Types.UreaN, Depth: 10)
              2015-12-09  [Fertiliser].Apply(Amount: 5, Type: Fertiliser.Types.UreaN, Depth: 10)
              2016-01-07  [Fertiliser].Apply(Amount: 5, Type: Fertiliser.Types.UreaN, Depth: 10)
              2016-02-10  [Fertiliser].Apply(Amount: 5, Type: Fertiliser.Types.UreaN, Depth: 10)
              2016-03-07  [Fertiliser].Apply(Amount: 5, Type: Fertiliser.Types.UreaN, Depth: 10)
              2016-04-02  [Fertiliser].Apply(Amount: 5, Type: Fertiliser.Types.UreaN, Depth: 10)
              2016-05-04  [Fertiliser].Apply(Amount: 5, Type: Fertiliser.Types.UreaN, Depth: 10)
              2016-08-31  [Fertiliser].Apply(Amount: 5, Type: Fertiliser.Types.UreaN, Depth: 10)
              2016-10-05  [Fertiliser].Apply(Amount: 5, Type: Fertiliser.Types.UreaN, Depth: 10)
            Operations 100
              2014-10-08  [Fertiliser].Apply(Amount: 10, Type: Fertiliser.Types.UreaN, Depth: 10)
              2014-10-31  [Fertiliser].Apply(Amount: 10, Type: Fertiliser.Types.UreaN, Depth: 10)
              2014-11-26  [Fertiliser].Apply(Amount: 10, Type: Fertiliser.Types.UreaN, Depth: 10)
              2014-12-17  [Fertiliser].Apply(Amount: 10, Type: Fertiliser.Types.UreaN, Depth: 10)
              2015-01-20  [Fertiliser].Apply(Amount: 10, Type: Fertiliser.Types.UreaN, Depth: 10)
              2015-02-12  [Fertiliser].Apply(Amount: 10, Type: Fertiliser.Types.UreaN, Depth: 10)
              2015-03-10  [Fertiliser].Apply(Amount: 10, Type: Fertiliser.Types.UreaN, Depth: 10)
              2015-04-17  [Fertiliser].Apply(Amount: 10, Type: Fertiliser.Types.UreaN, Depth: 10)
              2015-05-20  [Fertiliser].Apply(Amount: 10, Type: Fertiliser.Types.UreaN, Depth: 10)
              2015-09-09  [Fertiliser].Apply(Amount: 10, Type: Fertiliser.Types.UreaN, Depth: 10)
              2015-10-06  [Fertiliser].Apply(Amount: 10, Type: Fertiliser.Types.UreaN, Depth: 10)
              2015-11-06  [Fertiliser].Apply(Amount: 10, Type: Fertiliser.Types.UreaN, Depth: 10)
              2015-12-09  [Fertiliser].Apply(Amount: 10, Type: Fertiliser.Types.UreaN, Depth: 10)
              2016-01-07  [Fertiliser].Apply(Amount: 10, Type: Fertiliser.Types.UreaN, Depth: 10)
              2016-02-10  [Fertiliser].Apply(Amount: 10, Type: Fertiliser.Types.UreaN, Depth: 10)
              2016-03-07  [Fertiliser].Apply(Amount: 10, Type: Fertiliser.Types.UreaN, Depth: 10)
              2016-04-02  [Fertiliser].Apply(Amount: 10, Type: Fertiliser.Types.UreaN, Depth: 10)
              2016-05-04  [Fertiliser].Apply(Amount: 10, Type: Fertiliser.Types.UreaN, Depth: 10)
              2016-08-31  [Fertiliser].Apply(Amount: 10, Type: Fertiliser.Types.UreaN, Depth: 10)
              2016-10-05  [Fertiliser].Apply(Amount: 10, Type: Fertiliser.Types.UreaN, Depth: 10)
            Operations 200
              2014-10-08  [Fertiliser].Apply(Amount: 20, Type: Fertiliser.Types.UreaN, Depth: 10)
              2014-10-31  [Fertiliser].Apply(Amount: 20, Type: Fertiliser.Types.UreaN, Depth: 10)
              2014-11-26  [Fertiliser].Apply(Amount: 20, Type: Fertiliser.Types.UreaN, Depth: 10)
              2014-12-17  [Fertiliser].Apply(Amount: 20, Type: Fertiliser.Types.UreaN, Depth: 10)
              2015-01-20  [Fertiliser].Apply(Amount: 20, Type: Fertiliser.Types.UreaN, Depth: 10)
              2015-02-12  [Fertiliser].Apply(Amount: 20, Type: Fertiliser.Types.UreaN, Depth: 10)
              2015-03-10  [Fertiliser].Apply(Amount: 20, Type: Fertiliser.Types.UreaN, Depth: 10)
              2015-04-17  [Fertiliser].Apply(Amount: 20, Type: Fertiliser.Types.UreaN, Depth: 10)
              2015-05-20  [Fertiliser].Apply(Amount: 20, Type: Fertiliser.Types.UreaN, Depth: 10)
              2015-09-09  [Fertiliser].Apply(Amount: 20, Type: Fertiliser.Types.UreaN, Depth: 10)
              2015-10-06  [Fertiliser].Apply(Amount: 20, Type: Fertiliser.Types.UreaN, Depth: 10)
              2015-11-06  [Fertiliser].Apply(Amount: 20, Type: Fertiliser.Types.UreaN, Depth: 10)
              2015-12-09  [Fertiliser].Apply(Amount: 20, Type: Fertiliser.Types.UreaN, Depth: 10)
              2016-01-07  [Fertiliser].Apply(Amount: 20, Type: Fertiliser.Types.UreaN, Depth: 10)
              2016-02-10  [Fertiliser].Apply(Amount: 20, Type: Fertiliser.Types.UreaN, Depth: 10)
              2016-03-07  [Fertiliser].Apply(Amount: 20, Type: Fertiliser.Types.UreaN, Depth: 10)
              2016-04-02  [Fertiliser].Apply(Amount: 20, Type: Fertiliser.Types.UreaN, Depth: 10)
              2016-05-04  [Fertiliser].Apply(Amount: 20, Type: Fertiliser.Types.UreaN, Depth: 10)
              2016-08-31  [Fertiliser].Apply(Amount: 20, Type: Fertiliser.Types.UreaN, Depth: 10)
              2016-10-05  [Fertiliser].Apply(Amount: 20, Type: Fertiliser.Types.UreaN, Depth: 10)
            Operations 350
              2014-10-08  [Fertiliser].Apply(Amount: 35, Type: Fertiliser.Types.UreaN, Depth: 10)
              2014-10-31  [Fertiliser].Apply(Amount: 35, Type: Fertiliser.Types.UreaN, Depth: 10)
              2014-11-26  [Fertiliser].Apply(Amount: 35, Type: Fertiliser.Types.UreaN, Depth: 10)
              2014-12-17  [Fertiliser].Apply(Amount: 35, Type: Fertiliser.Types.UreaN, Depth: 10)
              2015-01-20  [Fertiliser].Apply(Amount: 35, Type: Fertiliser.Types.UreaN, Depth: 10)
              2015-02-12  [Fertiliser].Apply(Amount: 35, Type: Fertiliser.Types.UreaN, Depth: 10)
              2015-03-10  [Fertiliser].Apply(Amount: 35, Type: Fertiliser.Types.UreaN, Depth: 10)
              2015-04-17  [Fertiliser].Apply(Amount: 35, Type: Fertiliser.Types.UreaN, Depth: 10)
              2015-05-20  [Fertiliser].Apply(Amount: 35, Type: Fertiliser.Types.UreaN, Depth: 10)
              2015-09-09  [Fertiliser].Apply(Amount: 35, Type: Fertiliser.Types.UreaN, Depth: 10)
              2015-10-06  [Fertiliser].Apply(Amount: 35, Type: Fertiliser.Types.UreaN, Depth: 10)
              2015-11-06  [Fertiliser].Apply(Amount: 35, Type: Fertiliser.Types.UreaN, Depth: 10)
              2015-12-09  [Fertiliser].Apply(Amount: 35, Type: Fertiliser.Types.UreaN, Depth: 10)
              2016-01-07  [Fertiliser].Apply(Amount: 35, Type: Fertiliser.Types.UreaN, Depth: 10)
              2016-02-10  [Fertiliser].Apply(Amount: 35, Type: Fertiliser.Types.UreaN, Depth: 10)
              2016-03-07  [Fertiliser].Apply(Amount: 35, Type: Fertiliser.Types.UreaN, Depth: 10)
              2016-04-02  [Fertiliser].Apply(Amount: 35, Type: Fertiliser.Types.UreaN, Depth: 10)
              2016-05-04  [Fertiliser].Apply(Amount: 35, Type: Fertiliser.Types.UreaN, Depth: 10)
              2016-08-31  [Fertiliser].Apply(Amount: 35, Type: Fertiliser.Types.UreaN, Depth: 10)
              2016-10-05  [Fertiliser].Apply(Amount: 35, Type: Fertiliser.Types.UreaN, Depth: 10)
            Operations 500
              2014-10-08  [Fertiliser].Apply(Amount: 50, Type: Fertiliser.Types.UreaN, Depth: 10)
              2014-10-31  [Fertiliser].Apply(Amount: 50, Type: Fertiliser.Types.UreaN, Depth: 10)
              2014-11-26  [Fertiliser].Apply(Amount: 50, Type: Fertiliser.Types.UreaN, Depth: 10)
              2014-12-17  [Fertiliser].Apply(Amount: 50, Type: Fertiliser.Types.UreaN, Depth: 10)
              2015-01-20  [Fertiliser].Apply(Amount: 50, Type: Fertiliser.Types.UreaN, Depth: 10)
              2015-02-12  [Fertiliser].Apply(Amount: 50, Type: Fertiliser.Types.UreaN, Depth: 10)
              2015-03-10  [Fertiliser].Apply(Amount: 50, Type: Fertiliser.Types.UreaN, Depth: 10)
              2015-04-17  [Fertiliser].Apply(Amount: 50, Type: Fertiliser.Types.UreaN, Depth: 10)
              2015-05-20  [Fertiliser].Apply(Amount: 50, Type: Fertiliser.Types.UreaN, Depth: 10)
              2015-09-09  [Fertiliser].Apply(Amount: 50, Type: Fertiliser.Types.UreaN, Depth: 10)
              2015-10-06  [Fertiliser].Apply(Amount: 50, Type: Fertiliser.Types.UreaN, Depth: 10)
              2015-11-06  [Fertiliser].Apply(Amount: 50, Type: Fertiliser.Types.UreaN, Depth: 10)
              2015-12-09  [Fertiliser].Apply(Amount: 50, Type: Fertiliser.Types.UreaN, Depth: 10)
              2016-01-07  [Fertiliser].Apply(Amount: 50, Type: Fertiliser.Types.UreaN, Depth: 10)
              2016-02-10  [Fertiliser].Apply(Amount: 50, Type: Fertiliser.Types.UreaN, Depth: 10)
              2016-03-07  [Fertiliser].Apply(Amount: 50, Type: Fertiliser.Types.UreaN, Depth: 10)
              2016-04-02  [Fertiliser].Apply(Amount: 50, Type: Fertiliser.Types.UreaN, Depth: 10)
              2016-05-04  [Fertiliser].Apply(Amount: 50, Type: Fertiliser.Types.UreaN, Depth: 10)
              2016-08-31  [Fertiliser].Apply(Amount: 50, Type: Fertiliser.Types.UreaN, Depth: 10)
              2016-10-05  [Fertiliser].Apply(Amount: 50, Type: Fertiliser.Types.UreaN, Depth: 10)
        Simulation FRNLLincoln
          Clock: StartDate=2014-03-01; EndDate=2016-05-31
          Weather: FileName=Lincoln-Broadfields.met
          Summary summaryfile
          SoilArbitrator Soil Arbitrator
          Zone Field: Area=1; Slope=0
            Folder Management
              Operations Sowing
                2014-03-20  [Plantain].Sow(population: 200, cultivar: "Tonic", depth: 10, rowSpacing: 150)
              Operations IrrigationSchedule
                2014-10-31  [Irrigation].Apply(amount: 7)
                2014-11-03  [Irrigation].Apply(amount: 7)
                2014-11-05  [Irrigation].Apply(amount: 8)
                2014-11-07  [Irrigation].Apply(amount: 8)
                2014-11-10  [Irrigation].Apply(amount: 7)
                2014-11-11  [Irrigation].Apply(amount: 7)
                2014-11-12  [Irrigation].Apply(amount: 8)
                2014-11-17  [Irrigation].Apply(amount: 9)
                2014-11-18  [Irrigation].Apply(amount: 7)
                2014-11-19  [Irrigation].Apply(amount: 7)
                2014-11-24  [Irrigation].Apply(amount: 8)
                2014-11-25  [Irrigation].Apply(amount: 9)
                2014-11-27  [Irrigation].Apply(amount: 10)
                2014-12-01  [Irrigation].Apply(amount: 8)
                2014-12-02  [Irrigation].Apply(amount: 8)
                2014-12-04  [Irrigation].Apply(amount: 7)
                2014-12-08  [Irrigation].Apply(amount: 7)
                2014-12-09  [Irrigation].Apply(amount: 7)
                2014-12-12  [Irrigation].Apply(amount: 8)
                2014-12-15  [Irrigation].Apply(amount: 10)
                2014-12-17  [Irrigation].Apply(amount: 10)
                2014-12-19  [Irrigation].Apply(amount: 7)
                2014-12-20  [Irrigation].Apply(amount: 7)
                2014-12-21  [Irrigation].Apply(amount: 8)
                2014-12-22  [Irrigation].Apply(amount: 10)
                2014-12-25  [Irrigation].Apply(amount: 8)
                2014-12-26  [Irrigation].Apply(amount: 8)
                2014-12-27  [Irrigation].Apply(amount: 7)
                2014-12-28  [Irrigation].Apply(amount: 10)
                2014-12-29  [Irrigation].Apply(amount: 8)
                2014-12-30  [Irrigation].Apply(amount: 8)
                2015-01-02  [Irrigation].Apply(amount: 7)
                2015-01-05  [Irrigation].Apply(amount: 10)
                2015-01-08  [Irrigation].Apply(amount: 8)
                2015-01-09  [Irrigation].Apply(amount: 9)
                2015-01-12  [Irrigation].Apply(amount: 7)
                2015-01-13  [Irrigation].Apply(amount: 7)
                2015-01-16  [Irrigation].Apply(amount: 8)
                2015-01-19  [Irrigation].Apply(amount: 7)
                2015-01-20  [Irrigation].Apply(amount: 7)
                2015-01-21  [Irrigation].Apply(amount: 8)
                2015-01-26  [Irrigation].Apply(amount: 10)
                2015-01-27  [Irrigation].Apply(amount: 10)
                2015-01-29  [Irrigation].Apply(amount: 8)
                2015-02-02  [Irrigation].Apply(amount: 10)
                2015-02-04  [Irrigation].Apply(amount: 8)
                2015-02-05  [Irrigation].Apply(amount: 7)
                2015-02-09  [Irrigation].Apply(amount: 8)
                2015-02-11  [Irrigation].Apply(amount: 7)
                2015-02-12  [Irrigation].Apply(amount: 10)
                2015-02-16  [Irrigation].Apply(amount: 10)
                2015-02-17  [Irrigation].Apply(amount: 10)
                2015-02-18  [Irrigation].Apply(amount: 8)
                2015-02-24  [Irrigation].Apply(amount: 10)
                2015-02-26  [Irrigation].Apply(amount: 7)
                2015-02-27  [Irrigation].Apply(amount: 8)
                2015-03-02  [Irrigation].Apply(amount: 7)
                2015-03-03  [Irrigation].Apply(amount: 7)
                2015-03-05  [Irrigation].Apply(amount: 8)
                2015-03-10  [Irrigation].Apply(amount: 8)
                2015-03-12  [Irrigation].Apply(amount: 9)
                2015-03-13  [Irrigation].Apply(amount: 7)
                2015-03-16  [Irrigation].Apply(amount: 10)
                2015-03-19  [Irrigation].Apply(amount: 9)
                2015-03-20  [Irrigation].Apply(amount: 8)
                2015-03-23  [Irrigation].Apply(amount: 9)
                2015-03-24  [Irrigation].Apply(amount: 7)
                2015-03-26  [Irrigation].Apply(amount: 10)
                2015-03-30  [Irrigation].Apply(amount: 7)
                2015-04-02  [Irrigation].Apply(amount: 10)
                2015-04-03  [Irrigation].Apply(amount: 8)
                2015-04-06  [Irrigation].Apply(amount: 7)
                2015-04-08  [Irrigation].Apply(amount: 10)
                2015-04-17  [Irrigation].Apply(amount: 10)
                2015-05-20  [Irrigation].Apply(amount: 10)
                2015-06-09  [Irrigation].Apply(amount: 10)
                2015-09-09  [Irrigation].Apply(amount: 10)
                2015-09-30  [Irrigation].Apply(amount: 10)
                2015-10-02  [Irrigation].Apply(amount: 8)
                2015-10-06  [Irrigation].Apply(amount: 10)
                2015-10-09  [Irrigation].Apply(amount: 10)
                2015-10-12  [Irrigation].Apply(amount: 8)
                2015-10-13  [Irrigation].Apply(amount: 7)
                2015-10-16  [Irrigation].Apply(amount: 10)
                2015-10-20  [Irrigation].Apply(amount: 10)
                2015-10-21  [Irrigation].Apply(amount: 8)
                2015-10-23  [Irrigation].Apply(amount: 7)
                2015-10-26  [Irrigation].Apply(amount: 7)
                2015-10-27  [Irrigation].Apply(amount: 9)
                2015-11-02  [Irrigation].Apply(amount: 10)
                2015-11-03  [Irrigation].Apply(amount: 8)
                2015-11-04  [Irrigation].Apply(amount: 9)
                2015-11-06  [Irrigation].Apply(amount: 9)
                2015-11-09  [Irrigation].Apply(amount: 10)
                2015-11-11  [Irrigation].Apply(amount: 7)
                2015-11-16  [Irrigation].Apply(amount: 10)
                2015-11-18  [Irrigation].Apply(amount: 9)
                2015-11-20  [Irrigation].Apply(amount: 7)
                2015-11-23  [Irrigation].Apply(amount: 10)
                2015-11-24  [Irrigation].Apply(amount: 8)
                2015-11-25  [Irrigation].Apply(amount: 7)
                2015-11-27  [Irrigation].Apply(amount: 9)
                2015-11-30  [Irrigation].Apply(amount: 7)
                2015-12-01  [Irrigation].Apply(amount: 7)
                2015-12-04  [Irrigation].Apply(amount: 9)
                2015-12-07  [Irrigation].Apply(amount: 10)
                2015-12-09  [Irrigation].Apply(amount: 9)
                2015-12-10  [Irrigation].Apply(amount: 9)
                2015-12-22  [Irrigation].Apply(amount: 8)
                2015-12-24  [Irrigation].Apply(amount: 9)
                2015-12-26  [Irrigation].Apply(amount: 8)
                2015-12-29  [Irrigation].Apply(amount: 7)
                2015-12-31  [Irrigation].Apply(amount: 7)
                2016-01-01  [Irrigation].Apply(amount: 10)
                2016-01-07  [Irrigation].Apply(amount: 10)
                2016-01-09  [Irrigation].Apply(amount: 7)
                2016-01-11  [Irrigation].Apply(amount: 7)
                2016-01-12  [Irrigation].Apply(amount: 7)
                2016-01-13  [Irrigation].Apply(amount: 9)
                2016-01-15  [Irrigation].Apply(amount: 10)
                2016-01-21  [Irrigation].Apply(amount: 7)
                2016-01-25  [Irrigation].Apply(amount: 8)
                2016-01-30  [Irrigation].Apply(amount: 7)
                2016-02-02  [Irrigation].Apply(amount: 10)
                2016-02-03  [Irrigation].Apply(amount: 10)
                2016-02-05  [Irrigation].Apply(amount: 9)
                2016-02-08  [Irrigation].Apply(amount: 10)
                2016-02-11  [Irrigation].Apply(amount: 10)
                2016-02-12  [Irrigation].Apply(amount: 7)
                2016-02-15  [Irrigation].Apply(amount: 8)
                2016-02-16  [Irrigation].Apply(amount: 8)
                2016-02-22  [Irrigation].Apply(amount: 7)
                2016-02-23  [Irrigation].Apply(amount: 7)
                2016-02-25  [Irrigation].Apply(amount: 7)
                2016-02-26  [Irrigation].Apply(amount: 7)
                2016-03-01  [Irrigation].Apply(amount: 7)
                2016-03-02  [Irrigation].Apply(amount: 8)
                2016-03-04  [Irrigation].Apply(amount: 10)
                2016-03-07  [Irrigation].Apply(amount: 9)
                2016-03-08  [Irrigation].Apply(amount: 4)
                2016-03-10  [Irrigation].Apply(amount: 8)
                2016-03-14  [Irrigation].Apply(amount: 8)
                2016-03-15  [Irrigation].Apply(amount: 10)
                2016-03-18  [Irrigation].Apply(amount: 9)
                2016-03-21  [Irrigation].Apply(amount: 10)
                2016-03-22  [Irrigation].Apply(amount: 9)
                2016-03-23  [Irrigation].Apply(amount: 9)
                2016-03-28  [Irrigation].Apply(amount: 8)
                2016-04-02  [Irrigation].Apply(amount: 10)
                2016-04-08  [Irrigation].Apply(amount: 10)
                2016-05-04  [Irrigation].Apply(amount: 10)
                2016-08-31  [Irrigation].Apply(amount: 10)
                2016-10-05  [Irrigation].Apply(amount: 10)
                2016-10-18  [Irrigation].Apply(amount: 10)
                2016-10-26  [Irrigation].Apply(amount: 10)
              Operations NRate
              Manager Defoliate: same as Validation.New Zealand.No1FarmFD902.No1FarmFD902.Field.Management.Defoliate
              Operations DefoliationSchedule
                2014-10-08  [Defoliate].Script.Defoliate(defoliationType: "Cut", amountDM: 40, amountType: "ResidualDM", duration: 1)
                2014-10-30  [Defoliate].Script.Defoliate(defoliationType: "Cut", amountDM: 40, amountType: "ResidualDM", duration: 1)
                2014-11-25  [Defoliate].Script.Defoliate(defoliationType: "Cut", amountDM: 40, amountType: "ResidualDM", duration: 1)
                2014-12-17  [Defoliate].Script.Defoliate(defoliationType: "Cut", amountDM: 40, amountType: "ResidualDM", duration: 1)
                2015-01-16  [Defoliate].Script.Defoliate(defoliationType: "Cut", amountDM: 40, amountType: "ResidualDM", duration: 1)
                2015-02-11  [Defoliate].Script.Defoliate(defoliationType: "Cut", amountDM: 40, amountType: "ResidualDM", duration: 1)
                2015-03-10  [Defoliate].Script.Defoliate(defoliationType: "Cut", amountDM: 40, amountType: "ResidualDM", duration: 1)
                2015-04-16  [Defoliate].Script.Defoliate(defoliationType: "Cut", amountDM: 40, amountType: "ResidualDM", duration: 1)
                2015-05-20  [Defoliate].Script.Defoliate(defoliationType: "Cut", amountDM: 40, amountType: "ResidualDM", duration: 1)
                2015-09-02  [Defoliate].Script.Defoliate(defoliationType: "Cut", amountDM: 40, amountType: "ResidualDM", duration: 1)
                2015-10-06  [Defoliate].Script.Defoliate(defoliationType: "Cut", amountDM: 40, amountType: "ResidualDM", duration: 1)
                2015-11-06  [Defoliate].Script.Defoliate(defoliationType: "Cut", amountDM: 40, amountType: "ResidualDM", duration: 1)
                2015-12-07  [Defoliate].Script.Defoliate(defoliationType: "Cut", amountDM: 40, amountType: "ResidualDM", duration: 1)
                2016-01-07  [Defoliate].Script.Defoliate(defoliationType: "Cut", amountDM: 40, amountType: "ResidualDM", duration: 1)
                2016-02-04  [Defoliate].Script.Defoliate(defoliationType: "Cut", amountDM: 40, amountType: "ResidualDM", duration: 1)
                2016-03-04  [Defoliate].Script.Defoliate(defoliationType: "Cut", amountDM: 40, amountType: "ResidualDM", duration: 1)
                2016-03-31  [Defoliate].Script.Defoliate(defoliationType: "Cut", amountDM: 40, amountType: "ResidualDM", duration: 1)
                2016-05-04  [Defoliate].Script.Defoliate(defoliationType: "Cut", amountDM: 40, amountType: "ResidualDM", duration: 1)
              Manager ExtraVariables
                script: same as in Validation.New Zealand.No1FarmFD902.No1FarmFD902.Field.Management.ExtraVariables
            MicroClimate: a_interception=0; b_interception=1; c_interception=0; d_interception=0; soil_albedo=0.23; sun_angle=15; soil_heat_flux_fraction=0.4; night_interception_fraction=0.5; refheight=2; albedo=0.15; emissivity=0.96; RadIntTotal=0
            Irrigation
            Fertiliser
            SurfaceOrganicMatter: same as Validation.New Zealand.No1FarmFD902.No1FarmFD902.Field.SurfaceOrganicMatter
            Soil TempletonPaparua: SoilType=Udic Haplustept (US),  Immature Pallic Soil (NZ); LocalName=Templeton Fine Sandy Loam; Site=LURDF; NearestTown=Lincoln; Region=Canterbury; Country=New Zealand; Latitude=0; Longitude=0; DataSource=Adapted based on data from the NZ Natioanl Soils Database
              Comments=Different references name the soil at the site as either Templeton or Paparua (very similar soils)
              Analysis: PHUnits=Water; BoronUnits=HotWater
                Thickness  Rocks  PH  CEC   ParticleSizeSand  ParticleSizeSilt  ParticleSizeClay
                150        0      6   13.9  17.4              60.9              21.8
                150        0      6   9.9   24.8              56.9              18.3
                200        0      6   10.1  21                59.5              19.5
                250        0      6   7.4   37                52.6              10.3
                250        0      6   7.1   43.6              46.9              9.5
                500        0      6   7.6   24.2              59.3              16.6
              Water
                Thickness  BD    AirDry  LL15   DUL    SAT    KS
                150        1.35  0.057   0.17   0.34   0.439  2913.761
                150        1.43  0.159   0.177  0.325  0.409  1052.63
                200        1.54  0.186   0.186  0.327  0.362  182.149
                250        1.54  0.132   0.132  0.251  0.358  1272.997
                250        1.48  0.116   0.116  0.24   0.365  1767.199
                500        1.41  0.138   0.138  0.273  0.39   586.553
                SoilCrop PlantainSoil: LL=[0.17, 0.18, 0.19, 0.13, 0.12, 0.14]; KL=[0.12, 0.11, 0.06, 0.03, 0.01, 0.01]; XF=[1, 1, 1, 1, 1, 1]
              SoilWater: SummerDate=1-Nov; SummerU=6; SummerCona=3.5; WinterDate=1-apr; WinterU=2; WinterCona=2; DiffusConst=88; DiffusSlope=35; Salb=0.13; CN2Bare=73; CNRed=20; CNCov=0.8; max_pond=0; Thickness=[150, 150, 200, 250, 250, 500]; SWCON=[0.5, 0.41, 0.27, 0.39, 0.49, 0.42]; residueinterception=0
              SoilNitrogen: fom_type=[default, manure, mucuna, lablab, shemp, stable]; fract_carb=[0.2, 0.3, 0.54, 0.57, 0.45, 0]; fract_cell=[0.7, 0.3, 0.37, 0.37, 0.47, 0.1]; fract_lign=[0.1, 0.4, 0.09, 0.06, 0.08, 0.9]; wfpsN2N2O_x=[22, 88]; wfpsN2N2O_y=[0.1, 1]
              SoilOrganicMatter: RootCN=40; RootWt=1000; SoilCN=11.3; EnrACoeff=7.4; EnrBCoeff=0.2; OCUnits=Total
                Thickness  OC    FBiom  FInert
                150        2.6   0.045  0.475
                150        1.01  0.025  0.695
                200        0.4   0.022  0.845
                250        0.19  0.02   0.89
                250        0.22  0.01   0.96
                500        0.18  0.01   0.99
              InitialWater Initial water: PercentMethod=FilledFromTop; FractionFull=0.99
              Sample Initial nitrogen: NO3Units=kgha; NH4Units=kgha; SWUnits=Volumetric; OCUnits=Total; PHUnits=Water
                Thickness  NO3     NH4
                150        10.125  1
                150        8.58    0.75
                450        10.395  1.386
                250        5.55    0.5
                500        5.5     0.5
              CERESSoilTemperature
            Plant Plantain: CropType=Plantain
            Report: EventNames=[Clock].DoReport
            SoluteManager
            Report Report1: EventNames=[Clock].DoReport
              VariableNames:
                [SurfaceOrganicMatter].N as TotalSurfOMN
                [Soil].SoilNitrogen.FOMN
                [Soil].SoilNitrogen.HumicN
                [Soil].SoilNitrogen.MicrobialN
      Experiment FRNLRuakura
        Memo
          This simulation setup was based on field trials performed at DairyNZ's Scott Farm, in Ruakura, New Zealand, between 2014 and 2016.  The experiment was part of the FRNL (Forages for Reduced Nitrogen Leaching) program and the data is basically unpublished (references will be added when this come about).  Here only plots with pure plantain are used.
          The experiment consisted of six fertiliser treatments (N rates of 0, 50, 100, 200, 350 and 500 kg/ha/yr) in three replicates, and measurements comprised yield and quality indicators (here N content is used).
          Observed data supplied by Grant Edwards, Lincoln University.

          The soil at the experimental site was a Horotiu silt loam (an Orthic Allophanic soil; USDA: Typic Udivitrand), the parameters required were inferred using data from the New Zealand National Soils Database (Landcare Research).
          Weather data was obtained from nearby Ruakura weather station (NIWA).
        Factors
          Factor NRate: Specifications=[NRate]
            Operations 0
              2014-10-13  [Fertiliser].Apply(Amount: 26.4, Type: Fertiliser.Types.UreaN, Depth: 10)
              2014-12-23  [Fertiliser].Apply(Amount: 3.9, Type: Fertiliser.Types.UreaN, Depth: 10)
            Operations 50
              2014-10-13  [Fertiliser].Apply(Amount: 26.4, Type: Fertiliser.Types.UreaN, Depth: 10)
              2014-12-22  [Fertiliser].Apply(Amount: 5, Type: Fertiliser.Types.UreaN, Depth: 10)
              2014-12-23  [Fertiliser].Apply(Amount: 3.9, Type: Fertiliser.Types.UreaN, Depth: 10)
              2015-01-19  [Fertiliser].Apply(Amount: 5, Type: Fertiliser.Types.UreaN, Depth: 10)
              2015-03-23  [Fertiliser].Apply(Amount: 5, Type: Fertiliser.Types.UreaN, Depth: 10)
              2015-05-01  [Fertiliser].Apply(Amount: 5, Type: Fertiliser.Types.UreaN, Depth: 10)
              2015-06-18  [Fertiliser].Apply(Amount: 5, Type: Fertiliser.Types.UreaN, Depth: 10)
              2015-09-09  [Fertiliser].Apply(Amount: 5, Type: Fertiliser.Types.UreaN, Depth: 10)
              2015-10-29  [Fertiliser].Apply(Amount: 5, Type: Fertiliser.Types.UreaN, Depth: 10)
              2015-10-09  [Fertiliser].Apply(Amount: 5, Type: Fertiliser.Types.UreaN, Depth: 10)
              2015-11-24  [Fertiliser].Apply(Amount: 5, Type: Fertiliser.Types.UreaN, Depth: 10)
              2015-12-17  [Fertiliser].Apply(Amount: 5, Type: Fertiliser.Types.UreaN, Depth: 10)
              2016-01-26  [Fertiliser].Apply(Amount: 5, Type: Fertiliser.Types.UreaN, Depth: 10)
              2016-04-12  [Fertiliser].Apply(Amount: 5, Type: Fertiliser.Types.UreaN, Depth: 10)
              2016-06-30  [Fertiliser].Apply(Amount: 5, Type: Fertiliser.Types.UreaN, Depth: 10)
            Operations 100
              2014-10-13  [Fertiliser].Apply(Amount: 26.4, Type: Fertiliser.Types.UreaN, Depth: 10)
              2014-12-22  [Fertiliser].Apply(Amount: 10, Type: Fertiliser.Types.UreaN, Depth: 10)
              2014-12-23  [Fertiliser].Apply(Amount: 3.9, Type: Fertiliser.Types.UreaN, Depth: 10)
              2015-01-19  [Fertiliser].Apply(Amount: 10, Type: Fertiliser.Types.UreaN, Depth: 10)
              2015-03-23  [Fertiliser].Apply(Amount: 10, Type: Fertiliser.Types.UreaN, Depth: 10)
              2015-05-01  [Fertiliser].Apply(Amount: 10, Type: Fertiliser.Types.UreaN, Depth: 10)
              2015-06-18  [Fertiliser].Apply(Amount: 10, Type: Fertiliser.Types.UreaN, Depth: 10)
              2015-09-09  [Fertiliser].Apply(Amount: 10, Type: Fertiliser.Types.UreaN, Depth: 10)
              2015-10-09  [Fertiliser].Apply(Amount: 10, Type: Fertiliser.Types.UreaN, Depth: 10)
              2015-10-29  [Fertiliser].Apply(Amount: 10, Type: Fertiliser.Types.UreaN, Depth: 10)
              2015-11-24  [Fertiliser].Apply(Amount: 10, Type: Fertiliser.Types.UreaN, Depth: 10)
              2015-12-17  [Fertiliser].Apply(Amount: 10, Type: Fertiliser.Types.UreaN, Depth: 10)
              2016-01-26  [Fertiliser].Apply(Amount: 10, Type: Fertiliser.Types.UreaN, Depth: 10)
              2016-04-12  [Fertiliser].Apply(Amount: 10, Type: Fertiliser.Types.UreaN, Depth: 10)
              2016-06-30  [Fertiliser].Apply(Amount: 10, Type: Fertiliser.Types.UreaN, Depth: 10)
            Operations 200
              2014-10-13  [Fertiliser].Apply(Amount: 26.4, Type: Fertiliser.Types.UreaN, Depth: 10)
              2014-12-22  [Fertiliser].Apply(Amount: 20, Type: Fertiliser.Types.UreaN, Depth: 10)
              2014-12-23  [Fertiliser].Apply(Amount: 3.9, Type: Fertiliser.Types.UreaN, Depth: 10)
              2015-01-19  [Fertiliser].Apply(Amount: 20, Type: Fertiliser.Types.UreaN, Depth: 10)
              2015-03-23  [Fertiliser].Apply(Amount: 20, Type: Fertiliser.Types.UreaN, Depth: 10)
              2015-05-01  [Fertiliser].Apply(Amount: 20, Type: Fertiliser.Types.UreaN, Depth: 10)
              2015-06-18  [Fertiliser].Apply(Amount: 20, Type: Fertiliser.Types.UreaN, Depth: 10)
              2015-09-09  [Fertiliser].Apply(Amount: 20, Type: Fertiliser.Types.UreaN, Depth: 10)
              2015-10-09  [Fertiliser].Apply(Amount: 20, Type: Fertiliser.Types.UreaN, Depth: 10)
              2015-10-29  [Fertiliser].Apply(Amount: 20, Type: Fertiliser.Types.UreaN, Depth: 10)
              2015-11-24  [Fertiliser].Apply(Amount: 20, Type: Fertiliser.Types.UreaN, Depth: 10)
              2015-12-17  [Fertiliser].Apply(Amount: 20, Type: Fertiliser.Types.UreaN, Depth: 10)
              2016-01-26  [Fertiliser].Apply(Amount: 20, Type: Fertiliser.Types.UreaN, Depth: 10)
              2016-04-12  [Fertiliser].Apply(Amount: 20, Type: Fertiliser.Types.UreaN, Depth: 10)
              2016-06-30  [Fertiliser].Apply(Amount: 20, Type: Fertiliser.Types.UreaN, Depth: 10)
            Operations 350
              2014-10-13  [Fertiliser].Apply(Amount: 26.4, Type: Fertiliser.Types.UreaN, Depth: 10)
              2014-12-22  [Fertiliser].Apply(Amount: 35, Type: Fertiliser.Types.UreaN, Depth: 10)
              2014-12-23  [Fertiliser].Apply(Amount: 3.9, Type: Fertiliser.Types.UreaN, Depth: 10)
              2015-01-19  [Fertiliser].Apply(Amount: 35, Type: Fertiliser.Types.UreaN, Depth: 10)
              2015-03-23  [Fertiliser].Apply(Amount: 35, Type: Fertiliser.Types.UreaN, Depth: 10)
              2015-05-01  [Fertiliser].Apply(Amount: 35, Type: Fertiliser.Types.UreaN, Depth: 10)
              2015-06-18  [Fertiliser].Apply(Amount: 35, Type: Fertiliser.Types.UreaN, Depth: 10)
              2015-09-09  [Fertiliser].Apply(Amount: 35, Type: Fertiliser.Types.UreaN, Depth: 10)
              2015-10-09  [Fertiliser].Apply(Amount: 35, Type: Fertiliser.Types.UreaN, Depth: 10)
              2015-10-29  [Fertiliser].Apply(Amount: 35, Type: Fertiliser.Types.UreaN, Depth: 10)
              2015-11-24  [Fertiliser].Apply(Amount: 35, Type: Fertiliser.Types.UreaN, Depth: 10)
              2015-12-17  [Fertiliser].Apply(Amount: 35, Type: Fertiliser.Types.UreaN, Depth: 10)
              2016-01-26  [Fertiliser].Apply(Amount: 35, Type: Fertiliser.Types.UreaN, Depth: 10)
              2016-04-12  [Fertiliser].Apply(Amount: 35, Type: Fertiliser.Types.UreaN, Depth: 10)
              2016-06-30  [Fertiliser].Apply(Amount: 35, Type: Fertiliser.Types.UreaN, Depth: 10)
            Operations 500
              2014-10-13  [Fertiliser].Apply(Amount: 26.4, Type: Fertiliser.Types.UreaN, Depth: 10)
              2014-12-22  [Fertiliser].Apply(Amount: 50, Type: Fertiliser.Types.UreaN, Depth: 10)
              2014-12-23  [Fertiliser].Apply(Amount: 3.9, Type: Fertiliser.Types.UreaN, Depth: 10)
              2015-01-19  [Fertiliser].Apply(Amount: 50, Type: Fertiliser.Types.UreaN, Depth: 10)
              2015-03-23  [Fertiliser].Apply(Amount: 50, Type: Fertiliser.Types.UreaN, Depth: 10)
              2015-05-01  [Fertiliser].Apply(Amount: 50, Type: Fertiliser.Types.UreaN, Depth: 10)
              2015-06-18  [Fertiliser].Apply(Amount: 50, Type: Fertiliser.Types.UreaN, Depth: 10)
              2015-09-09  [Fertiliser].Apply(Amount: 50, Type: Fertiliser.Types.UreaN, Depth: 10)
              2015-10-09  [Fertiliser].Apply(Amount: 50, Type: Fertiliser.Types.UreaN, Depth: 10)
              2015-10-29  [Fertiliser].Apply(Amount: 50, Type: Fertiliser.Types.UreaN, Depth: 10)
              2015-11-24  [Fertiliser].Apply(Amount: 50, Type: Fertiliser.Types.UreaN, Depth: 10)
              2015-12-17  [Fertiliser].Apply(Amount: 50, Type: Fertiliser.Types.UreaN, Depth: 10)
              2016-01-26  [Fertiliser].Apply(Amount: 50, Type: Fertiliser.Types.UreaN, Depth: 10)
              2016-04-12  [Fertiliser].Apply(Amount: 50, Type: Fertiliser.Types.UreaN, Depth: 10)
              2016-06-30  [Fertiliser].Apply(Amount: 50, Type: Fertiliser.Types.UreaN, Depth: 10)
        Simulation FRNLRuakura
          Clock: StartDate=2014-06-01; EndDate=2016-06-30
          Weather: FileName=Ruakura.met
          Summary summaryfile
          SoilArbitrator Soil Arbitrator
          Zone Field: Area=1; Slope=0
            Folder Management
              Operations Sowing
                2014-10-24  [Plantain].Sow(population: 200, cultivar: "Tonic", depth: 10, rowSpacing: 150)
              Operations NRate
              Manager Defoliate: same as Validation.New Zealand.No1FarmFD902.No1FarmFD902.Field.Management.Defoliate
              Operations DefoliationSchedule
                2014-12-16  [Defoliate].Script.Defoliate(defoliationType: "Cut", amountDM: 60, amountType: "ResidualDM", duration: 1)
                2015-01-14  [Defoliate].Script.Defoliate(defoliationType: "Cut", amountDM: 60, amountType: "ResidualDM", duration: 1)
                2015-03-18  [Defoliate].Script.Defoliate(defoliationType: "Cut", amountDM: 60, amountType: "ResidualDM", duration: 1)
                2015-04-28  [Defoliate].Script.Defoliate(defoliationType: "Cut", amountDM: 60, amountType: "ResidualDM", duration: 1)
                2015-06-17  [Defoliate].Script.Defoliate(defoliationType: "Cut", amountDM: 60, amountType: "ResidualDM", duration: 1)
                2015-09-07  [Defoliate].Script.Defoliate(defoliationType: "Cut", amountDM: 60, amountType: "ResidualDM", duration: 1)
                2015-10-07  [Defoliate].Script.Defoliate(defoliationType: "Cut", amountDM: 60, amountType: "ResidualDM", duration: 1)
                2015-10-28  [Defoliate].Script.Defoliate(defoliationType: "Cut", amountDM: 60, amountType: "ResidualDM", duration: 1)
                2015-11-23  [Defoliate].Script.Defoliate(defoliationType: "Cut", amountDM: 60, amountType: "ResidualDM", duration: 1)
                2015-12-16  [Defoliate].Script.Defoliate(defoliationType: "Cut", amountDM: 60, amountType: "ResidualDM", duration: 1)
                2016-01-25  [Defoliate].Script.Defoliate(defoliationType: "Cut", amountDM: 60, amountType: "ResidualDM", duration: 1)
                2016-04-11  [Defoliate].Script.Defoliate(defoliationType: "Cut", amountDM: 60, amountType: "ResidualDM", duration: 1)
                2016-06-29  [Defoliate].Script.Defoliate(defoliationType: "Cut", amountDM: 60, amountType: "ResidualDM", duration: 1)
                2016-09-21  [Defoliate].Script.Defoliate(defoliationType: "Cut", amountDM: 60, amountType: "ResidualDM", duration: 1)
              Manager ExtraVariables
                script: same as in Validation.New Zealand.No1FarmFD902.No1FarmFD902.Field.Management.ExtraVariables
            MicroClimate: a_interception=0; b_interception=1; c_interception=0; d_interception=0; soil_albedo=0.23; sun_angle=15; soil_heat_flux_fraction=0.4; night_interception_fraction=0.5; refheight=2; albedo=0.15; emissivity=0.96; RadIntTotal=0
            Irrigation
            Fertiliser
            SurfaceOrganicMatter: same as Validation.New Zealand.No1FarmFD902.No1FarmFD902.Field.SurfaceOrganicMatter
            Soil HorotiuSoil: SoilType=Typic Udivitrand (US), Typic Orthic Allophanic Soil (NZ); LocalName=Horotiu silt loam; Site=Ruakura; NearestTown=Hamilton; Region=Waikato; Country=New Zealand; Latitude=0; Longitude=0; DataSource=Based primarily on data from Close et al, 2003
              Analysis: same as Validation.New Zealand.ScottFarmFD902.FD902.Field.HorotiuSoil.Analysis
              Water
                Thickness  BD    AirDry  LL15   DUL    SAT    KS
                200        0.88  0.114   0.228  0.373  0.581  553
                200        0.85  0.209   0.22   0.34   0.609  5083
                130        1.03  0.182   0.182  0.323  0.54   8353
                140        1.11  0.15    0.15   0.282  0.5    13589
                380        1.11  0.142   0.142  0.2    0.5    38963
                230        1.03  0.103   0.103  0.16   0.446  45280
                220        1.03  0.08    0.08   0.13   0.37   53606
                SoilCrop PlantainSoil: LL=[0.23, 0.22, 0.18, 0.15, 0.14, 0.1, 0.08]; KL=[0.1, 0.08, 0.05, 0.02, 0.01, 0.01, 0]; XF=[1, 1, 1, 1, 1, 1, 0.5]
              SoilWater: same as Validation.New Zealand.ScottFarmFD902.FD902.Field.HorotiuSoil.SoilWater
              SoilNitrogen: fom_type=[default, manure, mucuna, lablab, shemp, stable]; fract_carb=[0.2, 0.3, 0.54, 0.57, 0.45, 0]; fract_cell=[0.7, 0.3, 0.37, 0.37, 0.47, 0.1]; fract_lign=[0.1, 0.4, 0.09, 0.06, 0.08, 0.9]; wfpsN2N2O_x=[22, 88]; wfpsN2N2O_y=[0.1, 1]
              SoilOrganicMatter: RootCN=40; RootWt=1000; SoilCN=12.5; EnrACoeff=7.4; EnrBCoeff=0.2; OCUnits=Total
                Thickness  OC    FBiom  FInert
                200        8     0.06   0.6
                200        1.88  0.03   0.645
                130        0.93  0.021  0.675
                140        0.43  0.01   0.7
                380        0.13  0.01   0.78
                230        0.1   0.01   0.87
                220        0.07  0.01   0.95
              InitialWater Initial water: PercentMethod=EvenlyDistributed; FractionFull=0.9
              Sample Initial nitrogen: NO3Units=kgha; NH4Units=kgha; SWUnits=Volumetric; OCUnits=Total; PHUnits=Water
                Thickness  NO3    NH4
                200        26.4   0.88
                200        17     0.34
                600        32.78  0.609708
                500        5.19   0.48267
              CERESSoilTemperature
            Plant Plantain: CropType=Plantain
            Report: EventNames=[Clock].DoReport
            SoluteManager
    Folder USA
      Experiment RELARC_01
        Memo
          This simulation was adapted from a defoliation trial conducted in 1998-1999, at Russell E. Larson Agricultural Research Center, Pennsylvania, USA.  The trial consisted of small plots where two plantain cultivars ('*Lancelot*' and '*Tonic*') were sown separately in May-1997 (at 11.0 kg seed/ha).  Population decreased markedly after the 1998/99 winter and plantain plots were no longer used. Plots were fertilized with 27 kgP and 72 kgK/ha in October 1997. Fertilizer N was applied at 56 kg/ha in June and July of 1998.  Treatments were replicated five times and the soil at the site was a Hagerstown silt loam (fine, mixed, semiactive mesic Typic Hapludalfs).
          Each plot was divided in two, one-half was harvested every 3 wk and the other half every 5 wk. Each strip was cut to a 7-cm height with a rotary mower.  Dates for each cut were given, but only annual and treatment yields are reported;  population numbers were provided for few specific dates.  Yield for each harvest were arbitrarily inferred, therefore they should be seen as rough indication only.
          Met file was built using data obtained from NOAA website.  The data set was largely complete except for solar radiation, which was added from an alternative interpolated set for this location, also from NOAA.
          Information to assemble the soil data was obtained from USGS.

          References:
          Sanderson, M.A.; Labreveux, M.; Hall, M.H.; Elwinger, G.F. 2003. Forage yield and persistence of chicory and english plantain. Crop Science, 43: 995-1000.
        Factors
          Factor Cultivar: Specifications=[Sowing]
            Operations Lancelot
              1997-05-16  [Plantain].Sow(population: 250, cultivar: "Lancelot", depth: 10, rowSpacing: 150)
            Operations Tonic
              1997-05-16  [Plantain].Sow(population: 250, cultivar: "Tonic", depth: 10, rowSpacing: 150)
          Factor CutFrequency: Specifications=[Cuttings]
            Operations 3wks
              1998-05-19  [Defoliate].Script.Defoliate(defoliationType: "Cut", amountDM: 40, amountType: "ResidualDM", duration: 1)
              1998-06-10  [Defoliate].Script.Defoliate(defoliationType: "Cut", amountDM: 40, amountType: "ResidualDM", duration: 1)
              1998-06-30  [Defoliate].Script.Defoliate(defoliationType: "Cut", amountDM: 40, amountType: "ResidualDM", duration: 1)
              1998-07-21  [Defoliate].Script.Defoliate(defoliationType: "Cut", amountDM: 40, amountType: "ResidualDM", duration: 1)
              1998-08-11  [Defoliate].Script.Defoliate(defoliationType: "Cut", amountDM: 40, amountType: "ResidualDM", duration: 1)
              1998-09-02  [Defoliate].Script.Defoliate(defoliationType: "Cut", amountDM: 40, amountType: "ResidualDM", duration: 1)
              1998-09-23  [Defoliate].Script.Defoliate(defoliationType: "Cut", amountDM: 40, amountType: "ResidualDM", duration: 1)
              1999-05-20  [Defoliate].Script.Defoliate(defoliationType: "Cut", amountDM: 40, amountType: "ResidualDM", duration: 1)
              1999-06-10  [Defoliate].Script.Defoliate(defoliationType: "Cut", amountDM: 40, amountType: "ResidualDM", duration: 1)
              1999-07-01  [Defoliate].Script.Defoliate(defoliationType: "Cut", amountDM: 40, amountType: "ResidualDM", duration: 1)
              1999-07-22  [Defoliate].Script.Defoliate(defoliationType: "Cut", amountDM: 40, amountType: "ResidualDM", duration: 1)
              1999-08-12  [Defoliate].Script.Defoliate(defoliationType: "Cut", amountDM: 40, amountType: "ResidualDM", duration: 1)
              1999-09-02  [Defoliate].Script.Defoliate(defoliationType: "Cut", amountDM: 40, amountType: "ResidualDM", duration: 1)
              1999-09-23  [Defoliate].Script.Defoliate(defoliationType: "Cut", amountDM: 40, amountType: "ResidualDM", duration: 1)
            Operations 5wks
              1998-05-19  [Defoliate].Script.Defoliate(defoliationType: "Cut", amountDM: 40, amountType: "ResidualDM", duration: 1)
              1998-06-24  [Defoliate].Script.Defoliate(defoliationType: "Cut", amountDM: 40, amountType: "ResidualDM", duration: 1)
              1998-07-29  [Defoliate].Script.Defoliate(defoliationType: "Cut", amountDM: 40, amountType: "ResidualDM", duration: 1)
              1998-09-02  [Defoliate].Script.Defoliate(defoliationType: "Cut", amountDM: 40, amountType: "ResidualDM", duration: 1)
              1998-10-07  [Defoliate].Script.Defoliate(defoliationType: "Cut", amountDM: 40, amountType: "ResidualDM", duration: 1)
              1999-05-20  [Defoliate].Script.Defoliate(defoliationType: "Cut", amountDM: 40, amountType: "ResidualDM", duration: 1)
              1999-06-24  [Defoliate].Script.Defoliate(defoliationType: "Cut", amountDM: 40, amountType: "ResidualDM", duration: 1)
              1999-07-29  [Defoliate].Script.Defoliate(defoliationType: "Cut", amountDM: 40, amountType: "ResidualDM", duration: 1)
              1999-09-02  [Defoliate].Script.Defoliate(defoliationType: "Cut", amountDM: 40, amountType: "ResidualDM", duration: 1)
              1999-10-07  [Defoliate].Script.Defoliate(defoliationType: "Cut", amountDM: 40, amountType: "ResidualDM", duration: 1)
        Simulation TPASU_01
          Clock: StartDate=1997-05-01; EndDate=1998-12-31
          Weather: FileName=StateCollege.met
          Summary
          SoilArbitrator Soil Arbitrator
          Zone Field: Area=1; Slope=0
            Folder Management
              Manager ExtraVariables
```csharp
using System;
using Models.Core;
using System.Collections.Generic;
using System.Text;
using Models.Soils;
using Models.PMF;
using Models;
using System.Xml.Serialization;
using APSIM.Shared.Utilities;

namespace Models
{
	[Serializable] 
	public class Script : Model
	{
		[Link] Clock Clock;
		[Link] Soils.Soil Soil;
		[Link] Models.SurfaceOM.SurfaceOrganicMatter SOM;
		[Link] Weather Met;
		[Link] Fertiliser Fert;
		[Link] Irrigation Irrig;
		[Link] Plant Plantain;
		[Link] Zone zone;
					
		[XmlIgnore] public bool InitialDay { get; set; }
		
		[XmlIgnore] public double AccumPlantN { get; set; }
		[XmlIgnore] public double AccumMineralisation { get; set; }
		[XmlIgnore] public double AccumDenit { get; set; }
		[XmlIgnore] public double AccumFert { get; set; }
		[XmlIgnore] public double AccumLeach { get; set; }
		[XmlIgnore] public double AccumDetach { get; set; }
		[XmlIgnore] public double DeltaSoilOMN { get; set; }
		[XmlIgnore] public double DeltaSurfaceOMN { get; set; }
		[XmlIgnore] public double DeltaSoilMineralN { get; set; }
		[XmlIgnore] public double SoilNitrogenContent { get; set; }
		
		[XmlIgnore] public double AccumEO { get; set; }
		[XmlIgnore] public double AccumEP { get; set; }
		[XmlIgnore] public double AccumES { get; set; }
		[XmlIgnore] public double AccumDrainage { get; set; }
		[XmlIgnore] public double AccumRunoff { get; set; }
		[XmlIgnore] public double AccumOutflowLat { get; set; }
		[XmlIgnore] public double AccumIrrigation { get; set; }
		[XmlIgnore] public double AccumRainfall { get; set; }
		[XmlIgnore] public double SoilWaterDeficit { get; set; }
	
		[XmlIgnore] public double  InitialSoilOMN { get; set; }
		[XmlIgnore] public double  InitialSurfaceOMN { get; set; }
		[XmlIgnore] public double  InitialMineralN { get; set; }
		
		[XmlIgnore] public double SWC { get; set; }
		[XmlIgnore] public double DUL { get; set; }
		[XmlIgnore] public double OutFlowLat { get; set; }

		[XmlIgnore] public double FomN { get; set; }
		[XmlIgnore] public double BiomN { get; set; }
		[XmlIgnore] public double HumN { get; set; }
		[XmlIgnore] public double OrganicN { get; set; }
		[XmlIgnore] public double NO3N { get; set; }
		[XmlIgnore] public double NH4N { get; set; }
		[XmlIgnore] public double UreaN { get; set; }
		[XmlIgnore] public double MineralN { get; set; }
		[XmlIgnore] public double DltNMinRes { get; set; }
		[XmlIgnore] public double DltNMinTot { get; set; }
		
		[EventSubscribe("Commencing")]
		private void OnSimulationCommencing(object sender, EventArgs e)
		{
			InitialDay = true;
		}
		
		[EventSubscribe("DoManagement")]
		private void OnDoManagement(object sender, EventArgs e)
		{
			//!!!!!! Nitrogen balance components !!!!!!
			//!!!!!!^^^^^^^^^^^^^^^^^^^^^^^^^^^^^!!!!!!
			FomN = MathUtilities.Sum(Soil.SoilNitrogen.FOMN);
			HumN = MathUtilities.Sum(Soil.SoilNitrogen.HumicN);
			BiomN = MathUtilities.Sum(Soil.SoilNitrogen.MicrobialN);
			OrganicN = FomN + HumN + BiomN;
			NO3N = MathUtilities.Sum(Soil.NO3N);
			NH4N = MathUtilities.Sum(Soil.NH4N);
			UreaN = MathUtilities.Sum(Soil.SoilNitrogen.urea);
			MineralN = NO3N + NH4N + UreaN; 
			DltNMinRes = MathUtilities.Sum(Soil.SoilNitrogen.dlt_n_min_res);
			DltNMinTot = MathUtilities.Sum(Soil.SoilNitrogen.MineralisedN);
			int layers = Soil.Thickness.Length;
			if (InitialDay == true)
			{
				InitialSurfaceOMN = SOM.N;
				InitialSoilOMN = OrganicN;
				InitialMineralN = MineralN;
				InitialDay = false;
			}
			DeltaSurfaceOMN = SOM.N - InitialSurfaceOMN;
			AccumLeach = AccumLeach - Soil.SoilWater.LeachNH4 - Soil.SoilWater.LeachNO3 - Soil.SoilWater.LeachUrea; //Fails
			AccumMineralisation += MathUtilities.Sum(Soil.SoilNitrogen.MineralisedN);
			AccumDenit -= MathUtilities.Sum(Soil.SoilNitrogen.Denitrification);
			AccumPlantN -= (double)zone.Get("Plantain.Root.NUptake");
			DeltaSoilOMN = OrganicN - InitialSoilOMN;
			DeltaSoilMineralN = MineralN - InitialMineralN;
			SoilNitrogenContent = MineralN;
			
			//!!!!!! Water balance components !!!!!!
			//!!!!!!^^^^^^^^^^^^^^^^^^^^^^^^^^!!!!!!

			AccumRainfall += Met.Rain;
			//AccumEP -= (double)zone.Get("[Plantain].Leaf.Transpiration");
			AccumEP -= (double)zone.Get("Plantain.Root.WaterUptake");
			SoilWaterDeficit = (SWC - DUL);
			double OutFlowLat = MathUtilities.Sum(Soil.SoilWater.outflow_lat);
			AccumOutflowLat -= OutFlowLat;
		}
		
		[EventSubscribe("DoManagementCalculations")]
		private void OnDoManagementCalculations(object sender, EventArgs e)
		{
			FomN = MathUtilities.Sum(Soil.SoilNitrogen.FOMN);
			HumN = MathUtilities.Sum(Soil.SoilNitrogen.HumicN);
			BiomN = MathUtilities.Sum(Soil.SoilNitrogen.MicrobialN);
			AccumFert += Fert.NitrogenApplied;
			AccumIrrigation += Irrig.IrrigationApplied;
			
			
			AccumEO -= Soil.SoilWater.Eo;
			AccumES -= Soil.SoilWater.Es; 
			AccumDrainage -= Soil.SoilWater.Drainage;
			AccumRunoff -= Soil.SoilWater.Runoff;
			SWC = MathUtilities.Sum(Soil.SoilWater.SWmm);
			DUL = MathUtilities.Sum(Soil.SoilWater.DULmm);
		}
	}
}
```
              Operations Sowing
              Operations FertiliserSchedule
                1997-09-15  [Defoliate].Script.Defoliate(defoliationType: "Cut", amountDM: 50, amountType: "ResidualDM", duration: 1)
                1998-06-11  [Fertiliser].Apply(Amount: 56, Type: Fertiliser.Types.NH4NO3N, Depth: 10)
                1998-07-30  [Fertiliser].Apply(Amount: 56, Type: Fertiliser.Types.NH4NO3N, Depth: 10)
              Operations Cuttings
              Manager Defoliate: same as Validation.New Zealand.No1FarmFD902.No1FarmFD902.Field.Management.Defoliate
            MicroClimate: a_interception=0; b_interception=1; c_interception=0; d_interception=0; soil_albedo=0.23; sun_angle=15; soil_heat_flux_fraction=0.4; night_interception_fraction=0.5; refheight=2; albedo=0.26; emissivity=0.96; RadIntTotal=0
            SurfaceOrganicMatter: PondActive=no; ReportAdditions=no; ReportRemovals=no; PoolName=grass; type=grass; mass=500; standing_fraction=0; cnr=40; CriticalResidueWeight=2000; OptimumDecompTemp=20; MaxCumulativeEOS=20; CNRatioDecompCoeff=0.277; CNRatioDecompThreshold=25; TotalLeachRain=25; MinRainToLeach=10; CriticalMinimumOrganicC=0.004; DefaultCPRatio=0; DefaultStandingFraction=0; StandingExtinctCoeff=0.5; FractionFaecesAdded=0.5
              Pools:
                {PoolName=grass, ResidueType=grass, Mass=500, CNRatio=40, StandingFraction=0}
              ResidueTypes: LoadFromResource=ResidueTypes
              TillageTypes TillageTypesList
            Irrigation
            Fertiliser
            Soil HagerstownSoil: SoilType=Typic Hapludult (US); LocalName=Ramsey fine-loam; State=West Virginia; Country=USA; NaturalVegetation=Forest; Latitude=0; Longitude=0; DataSource=National Cooperative Soil Survey, US
              Comments=Generic soil description based on data of the same sol type from different locations
              Analysis: PHUnits=Water; BoronUnits=HotWater
                Thickness  Rocks  PH  CEC   ParticleSizeSand  ParticleSizeSilt  ParticleSizeClay
                100        4.4    6   10.3  11.4              66.9              21.7
                120        5.7    6   10.3  10.9              66.7              22.4
                130        10.2   6   9.1   11.9              64.3              23.8
                200        8.9    6   8.8   13.7              60.8              25.5
                300        9.4    6   10.1  11.1              45.6              43.3
                300        8.1    6   10    8.7               39.9              51.4
                350        1.6    6   9.7   9.3               42.7              48
              Water
                Thickness  BD    AirDry  LL15   DUL    SAT    KS
                100        1.3   0.048   0.12   0.277  0.465  1200
                120        1.38  0.085   0.094  0.264  0.421  420
                130        1.37  0.079   0.079  0.238  0.381  275
                200        1.41  0.094   0.094  0.222  0.381  200
                300        1.47  0.141   0.141  0.255  0.338  80
                300        1.48  0.155   0.155  0.28   0.359  40
                350        1.52  0.166   0.166  0.296  0.409  80
                SoilCrop PlantainSoil: LL=[0.12, 0.09, 0.08, 0.09, 0.14, 0.16, 0.17]; KL=[0.1, 0.09, 0.08, 0.05, 0.03, 0.02, 0.02]; XF=[1, 1, 1, 1, 1, 1, 1]
              SoilWater: SummerDate=21-Mar; SummerU=6; SummerCona=3.5; WinterDate=23-Sep; WinterU=6; WinterCona=2.5; DiffusConst=88; DiffusSlope=35; Salb=0.13; CN2Bare=73; CNRed=20; CNCov=0.8; max_pond=0; Thickness=[100, 120, 130, 200, 300, 300, 350]; SWCON=[0.6, 0.5, 0.3, 0.3, 0.25, 0.2, 0.3]; residueinterception=0
              SoilNitrogen: fom_type=[default, manure, mucuna, lablab, shemp, stable]; fract_carb=[0.2, 0.3, 0.54, 0.57, 0.45, 0]; fract_cell=[0.7, 0.3, 0.37, 0.37, 0.47, 0.1]; fract_lign=[0.1, 0.4, 0.09, 0.06, 0.08, 0.9]; wfpsN2N2O_x=[22, 88]; wfpsN2N2O_y=[0.1, 1]
              SoilOrganicMatter: RootCN=40; RootWt=1000; SoilCN=11; EnrACoeff=7.4; EnrBCoeff=0.2; OCUnits=Total
                Thickness  OC    FBiom  FInert
                100        3.26  0.03   0.4
                120        1.17  0.02   0.6
                130        0.39  0.01   0.75
                200        0.4   0.01   0.875
                300        0.25  0.01   0.95
                300        0.2   0.01   0.99
                350        0.15  0.01   0.99
              InitialWater Initial water: PercentMethod=EvenlyDistributed; FractionFull=0.95
              Sample Initial nitrogen: NO3Units=kgha; NH4Units=kgha; SWUnits=Volumetric; OCUnits=Total; PHUnits=Water
                Thickness  NO3  NH4
                100        20   2
                120        15   2
                330        10   1
                950        5    0.5
              CERESSoilTemperature
            Plant Plantain: CropType=Plantain
            Report: EventNames=[Clock].DoReport
            SoluteManager
      Experiment RELARC_02
        Memo
          This simulation was adapted from a defoliation trial conducted in 2000-2001, at Russell E. Larson Agricultural Research Center, Pennsylvania, USA.  The trial was established in small plots, replicated five times, with plantain sown in April-1999 (Cultivars '*Lancelot*' and '*Tonic*'.  Only data from the first year is used as the population declined markedly in winter.  All plots received 4.5 t/ha of limestone and were fertilized with 56 kg N/ha in April, June and July of 2000.  The soil at the site was a Hagerstown silt loam (fine, mixed, semiactive mesic Typic Hapludalfs).
          Each plot was mechanically mowed to height of 7cm every 4 weeks.  Only annual and treatment yields are reported, however population was given for specific dates.  Dates for each harvest were reported.  From these data, yield was arbitrarily inferred for each harvest, therefore they should be seen as rough approximation only (N variation between cultivars were considered here).
          Met file was built using data obtained from NOAA website.  The data set was largely complete except for solar radiation, which was added from an alternative interpolated set for this location, also from NOAA.
          Information to assemble the soil data was obtained from USGS.

          References:
          Sanderson, M.A.; Labreveux, M.; Hall, M.H.; Elwinger, G.F. 2003. Forage yield and persistence of chicory and english plantain. Crop Science, 43: 995-1000.
        Factors
          Factor Cultivars: Specifications=[Sowing]
            Operations Lancelot
              1999-04-28  [Plantain].Sow(population: 300, cultivar: "Lancelot", depth: 10, rowSpacing: 150)
            Operations Tonic
              1999-04-28  [Plantain].Sow(population: 300, cultivar: "Tonic", depth: 10, rowSpacing: 150)
        Simulation TPASU_02
          Clock: StartDate=1999-04-01; EndDate=2000-12-31
          Weather: FileName=StateCollege.met
          Summary
          SoilArbitrator Soil Arbitrator
          Zone Field: Area=1; Slope=0
            Folder Management
              Manager ExtraVariables: same as Validation.USA.RELARC_01.TPASU_01.Field.Management.ExtraVariables
              Operations Sowing
              Operations FertiliserSchedule
                1999-09-15  [Defoliate].Script.Defoliate(defoliationType: "Cut", amountDM: 50, amountType: "ResidualDM", duration: 1)
                2000-04-25  [Fertiliser].Apply(Amount: 56, Type: Fertiliser.Types.NH4NO3N, Depth: 10)
                2000-06-15  [Fertiliser].Apply(Amount: 56, Type: Fertiliser.Types.NH4NO3N, Depth: 10)
                2000-07-12  [Fertiliser].Apply(Amount: 56, Type: Fertiliser.Types.NH4NO3N, Depth: 10)
              Operations Cuttings
                2000-05-16  [Defoliate].Script.Defoliate(defoliationType: "Cut", amountDM: 40, amountType: "ResidualDM", duration: 1)
                2000-06-14  [Defoliate].Script.Defoliate(defoliationType: "Cut", amountDM: 40, amountType: "ResidualDM", duration: 1)
                2000-07-11  [Defoliate].Script.Defoliate(defoliationType: "Cut", amountDM: 40, amountType: "ResidualDM", duration: 1)
                2000-08-08  [Defoliate].Script.Defoliate(defoliationType: "Cut", amountDM: 40, amountType: "ResidualDM", duration: 1)
                2000-09-05  [Defoliate].Script.Defoliate(defoliationType: "Cut", amountDM: 40, amountType: "ResidualDM", duration: 1)
              Manager Defoliate: same as Validation.New Zealand.No1FarmFD902.No1FarmFD902.Field.Management.Defoliate
            MicroClimate: a_interception=0; b_interception=1; c_interception=0; d_interception=0; soil_albedo=0.23; sun_angle=15; soil_heat_flux_fraction=0.4; night_interception_fraction=0.5; refheight=2; albedo=0.26; emissivity=0.96; RadIntTotal=0
            SurfaceOrganicMatter: same as Validation.USA.RELARC_01.TPASU_01.Field.SurfaceOrganicMatter
            Irrigation
            Fertiliser
            Soil HagerstownSoil: same as Validation.USA.RELARC_01.TPASU_01.Field.HagerstownSoil
            Plant Plantain: CropType=Plantain
            Report: EventNames=[Clock].DoReport
            SoluteManager
      Memo SubTitle
        ### All data from USA
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