Simulations: Version=67
  Memo About this example
    # Report Model Documentation and Example

    *Dean Holzworth (CSIRO, Australia) and Val Snow (AgResearch, New Zealand)*

    (Text last updated 17 October 2019)

    **Report** is the model in APSIM that is used to generate columns of simulation outputs for further analysis.

    The simulations in this example are to show examples of the different reporting capabilities and to provide a test that they continue to produce the correct results.

    The intention is that this documentation is read alongside the simulation that produced it to see the detail of the examples. The simulation is to be found under the "Examples" button as Report.apsim.
  DataStore
  Simulation SimpleReportingSim
    Clock: Start=1980-01-01; End=1990-12-31
    Summary SummaryFile
    Weather: FileName=%root%\Examples\WeatherFiles\Dalby.met
    SoilArbitrator
    Zone Field: Area=1; Slope=0
      Manager Sowing
        StartDate = 1-may
        EndDate = 10-jul
        MinESW = 100
        MinRain = 25
        RainDays = 7
        CultivarName = Hartog
        SowingDepth = 30
        RowSpacing = 250
        Population = 120
```csharp
using System;
using Models.Core;
using Models.PMF;
using Models.Soils;
using Models.Soils.Nutrients;
using Models.Utilities;
using APSIM.Shared.Utilities;

namespace Models
{
    [Serializable]
    public class Script : Model
    {
        [Link] Clock Clock;
        [Link] Fertiliser Fertiliser;
        [Link] Summary Summary;
        [Link] Plant Wheat;
        [Link] Soil Soil; 
        Accumulator accumulatedRain;
        
        [Description("Start of sowing window (d-mmm)")]
        public string StartDate { get; set;}
        [Description("End of sowing window (d-mmm)")]
        public string EndDate { get; set;}
        [Description("Minimum extractable soil water for sowing (mm)")]
        public double MinESW { get; set;}
        [Description("Accumulated rainfall required for sowing (mm)")]
        public double MinRain { get; set;}
        [Description("Duration of rainfall accumulation (d)")]
        public int RainDays { get; set;}
        [Description("Cultivar to be sown")]
        [Display(Type=DisplayType.CultivarName)]
        public string CultivarName { get; set;}
        [Description("Sowing depth (mm)")]
        public double SowingDepth { get; set;}        
        [Description("Row spacing (mm)")]
        public double RowSpacing { get; set;}    
        [Description("Plant population (/m2)")]
        public double Population { get; set;}    
        
        
        [EventSubscribe("Commencing")]
        private void OnSimulationCommencing(object sender, EventArgs e)
        {
            accumulatedRain = new Accumulator(this, "[Weather].Rain", RainDays);
        }
        

        [EventSubscribe("DoManagement")]
        private void OnDoManagement(object sender, EventArgs e)
        {
            accumulatedRain.Update();
            
            if (DateUtilities.WithinDates(StartDate,Clock.Today,EndDate) &&
                !Wheat.IsAlive &&
                MathUtilities.Sum(Soil.SoilWater.ESW) > MinESW &&
                accumulatedRain.Sum > MinRain)
            {
               Wheat.Sow(population:Population, cultivar:CultivarName, depth:SowingDepth, rowSpacing:RowSpacing);    
            }
        
        }
        
    }
}
```
      Manager Fertilise at sowing
        Crop = [Wheat]
        FertiliserType = UreaN
        Amount = 160
```csharp
using System;
using Models.Core;
using Models.PMF;
namespace Models
{
    [Serializable]
    public class Script : Model
    {
        [Link] Clock Clock;
        [Link] Fertiliser Fertiliser;
        [Link] Summary Summary;

        [Description("Crop to be fertilised")]
        public IPlant Crop { get; set; }

        [Description("Type of fertiliser to apply? ")] public Fertiliser.Types FertiliserType { get; set; }

    
        [Description("Amount of fertiliser to be applied (kg/ha)")]
        public double Amount { get; set; }
        
        [EventSubscribe("Sowing")]
        private void OnSowing(object sender, EventArgs e)
        {
            Model crop = sender as Model;
            if (Crop != null && crop.Name.ToLower() == (Crop as IModel).Name.ToLower())
            {
            	Summary.WriteMessage(this, "Sowing fertilsier");
                Fertiliser.Apply(Amount: Amount, Type: FertiliserType);
            }
        }
        
    }
}
```
      Manager Harvest
```csharp
using System;
using Models.Core;
using Models.PMF;
using Models.Soils;
using Models.Soils.Nutrients;
using Models.Utilities;
using APSIM.Shared.Utilities;

namespace Models
{
    [Serializable]
    public class Script : Model
    {
        [Link] Plant Wheat;

        [EventSubscribe("DoManagement")]
        private void OnDoManagement(object sender, EventArgs e)
        {
            if (Wheat.IsReadyForHarvesting)
            {
               Wheat.Harvest();
               Wheat.EndCrop();    
            }
        
        }
        
    }
}
```
      Manager AutoIrrig
        FASW = 0
        WaterDeficit = 0
        AutoIrrigationOn = True
        FASWThreshold = 0.75
        FASWDepth = 600
```csharp
using System;
using Models.Core;
using System.Collections.Generic;
using System.Text;
using Models.Soils;
using Models.PMF;
using Models;
using System.Xml.Serialization;
using APSIM.Shared.Utilities;

namespace Models
{
    [Serializable] 
    public class Script : Model
    {
        public double FASW { get; set; }
        public double WaterDeficit  { get; set; }
    
        [Link] Zone zone;
        [Link] Irrigation irrigation;
        [Link] Soil soil;
        
        [Description("Auto irrigation on?")]
        public bool AutoIrrigationOn { get; set; }

        [Description("Threshold fraction available water (0-1)")]
        public double FASWThreshold { get; set; }

        [Description("Soil depth (mm) to which fraction available water is calculated")]
        public double FASWDepth { get; set; }

        [EventSubscribe("DoManagement")]
        private void OnDoManagement(object sender, EventArgs e)
        {
            CalculateFASW();
            if (AutoIrrigationOn)
            {
                if (FASW < FASWThreshold)
                {
                    double amount = 10;
                    irrigation.Apply(WaterDeficit, depth: 0);
                }
            }
        }
        
        private void CalculateFASW()
        {
            double[] LL15 = MathUtilities.Multiply(soil.LL15, soil.Thickness);
            double[] DUL = MathUtilities.Multiply(soil.DUL, soil.Thickness);
        
            int nlayr = GetLayerIndex();
            double cumdep = MathUtilities.Sum(soil.Thickness, 0, nlayr, 0.0);

            double excess_fr = MathUtilities.Divide((cumdep - FASWDepth), soil.Thickness[nlayr], 0.0);

            // note that results may be strange if swdep < ll15
            double avail_sw = (MathUtilities.Sum(soil.Water, 0, nlayr, 0.0)
                              - excess_fr * soil.Water[nlayr])
                              - (MathUtilities.Sum(LL15, 0, nlayr, 0.0)
                              - excess_fr * LL15[nlayr]);


            double pot_avail_sw = (MathUtilities.Sum(DUL, 0, nlayr, 0.0)
                                  - excess_fr * DUL[nlayr])
                                  - (MathUtilities.Sum(LL15, 0, nlayr, 0.0)
                                  - excess_fr * LL15[nlayr]);

            FASW = MathUtilities.Divide(avail_sw, pot_avail_sw, 0.0);
            WaterDeficit = MathUtilities.Constrain(pot_avail_sw - avail_sw, 0.0, 100000);
        }

        private int GetLayerIndex()
        {
            double[] cumThickness = soil.ThicknessCumulative;
            for (int i = 1; i < cumThickness.Length; i++)
            {
                if (FASWDepth < cumThickness[i])
                    return i - 1;
            }
            
            return cumThickness.Length - 1;
        }

    }
}
```
      Manager ReportHelper
        ReportEveryYear_Name = [ReportOnSpecificDaysEveryYear]
        ReportEveryYear_Dates = 21-mar,23-nov,11-aug
        ReportSpecificDates_Name = [ReportOnSpecificDates]
        ReportSpecificDates_Dates = 03/27/1980 00:00:00,08/15/1981 00:00:00
```csharp
using System;
using Models.Core;
using System.Collections.Generic;
using System.Text;
using Models.Soils;
using Models.PMF;
using Models;
using System.Xml.Serialization;
using APSIM.Shared.Utilities;

namespace Models
{
    [Serializable]
    public class Script : Model
    {
        [Link] Clock clock;
        [Link] Zone zone;
        [Link] Summary summary;

        [Separator("NOTE - all dates or date strings are entered with comma-separation and no spaces")]
        [Separator("NOTE - this component should be at the bottom of the list of Managers")]
        [Separator("   ")]
        [Separator("Example for reporting in particular days but the same days every year")]

        //ReportOnSpecificDaysEveryYear
        [Description("Name of the Report model for reporting on below dates every year: ")] 
        [Display(Type=DisplayType.Model, ModelType = typeof(Report.Report))]
        public Report.Report ReportEveryYear_Name { get; set; } 

        [Description("Enter one or more dates (as dd-mmm) for reporting : ")] 
        public string[] ReportEveryYear_Dates { get; set; } 

        [Separator("Example for reporting on absolute dates")]

        [Description("Name of the Report model for reporting on completely specified dates: ")] 
        [Display(Type=DisplayType.Model, ModelType = typeof(Report.Report))]
        public Report.Report ReportSpecificDates_Name { get; set; } 

        [Description("Enter one or more dates (as dd-mmm-yyyy) for reporting : ")] 
        public DateTime[] ReportSpecificDates_Dates { get; set; } 



        [EventSubscribe("DoManagementCalculations")]
        private void OnDoManagement(object sender, EventArgs e)
        {

			// example for reporting on irregular dates but the same dates every year
			if (ReportEveryYear_Dates != null)
	        	foreach (string ddMMM in ReportEveryYear_Dates)
    				if (DateUtilities.DatesEqual(ddMMM, clock.Today))
	            	    ReportEveryYear_Name.DoOutput();

			// example for reporting on fully-specified dates that are not necessarily the same dates every year
			if (ReportSpecificDates_Dates != null)
	        	foreach (DateTime ddMMMyy in ReportSpecificDates_Dates)
    				if (DateUtilities.Equals(ddMMMyy, clock.Today))
	            	    ReportSpecificDates_Name.DoOutput();




			/*if (ReportSpecificDates_Dates != null)
			{
	        	foreach (DateTime ddMMMyy in ReportSpecificDates_Dates)
    	    	{
    				if (DateUtilities.Equals(ddMMMyy, clock.Today))
    				{
	            	    Models.Report.Report myReport = Apsim.Find(zone, ReportSpecificDates_Name) as Models.Report.Report;
    	            	if (myReport == null)
        	            	throw new Exception(string.Format("Unable to locate report {0}.", ReportSpecificDates_Name));
	            	    myReport.DoOutput();
    				}
        		}
			}*/

        }
        
    }
}
```
      Fertiliser
      Irrigation
      MicroClimate: a_interception=0; b_interception=1; c_interception=0; d_interception=0; soil_albedo=0.3; SoilHeatFluxFraction=0.4; NightInterceptionFraction=0.5; ReferenceHeight=2
      Plant Wheat: CropType=Wheat; IsEnding=false; DaysAfterEnding=0
      SurfaceOrganicMatter: InitialResidueName=wheat_stubble; InitialResidueType=wheat; InitialResidueMass=500; InitialStandingFraction=0; InitialCPR=0; InitialCNR=100; FractionFaecesAdded=0.5
      Soil: ASCOrder=Vertosol; ASCSubOrder=Black; SoilType=Clay; Site=Norwin; NearestTown=Norwin; Region=Darling Downs and Granite Belt; State=Queensland; Country=Australia; NaturalVegetation=Qld. Bluegrass, possible Qld. Blue gum; ApsoilNumber=900; Latitude=-27.581836; Longitude=151.320206; LocationAccuracy=+/- 20m
        DataSource=CSIRO Sustainable Ecosystems, Toowoomba; Characteriesd as part of the GRDC funded project"Doing it better, doing it smarter, managing soil water in Australian agriculture' 2011
        Comments=OC, CLL for all crops estimated-based on Bongeen Mywybilla Soil No1
        Physical
          Thickness  BD       AirDry    LL15      DUL       SAT       KS
          150        1.01056  0.13025   0.2605    0.521     0.588655  20
          150        1.07146  0.198689  0.248362  0.496723  0.565677  20
          300        1.09394  0.28      0.28      0.488438  0.557193  20
          300        1.15861  0.28      0.28      0.480297  0.532787  20
          300        1.17301  0.28      0.28      0.471584  0.527354  20
          300        1.16287  0.28      0.28      0.457071  0.53118   20
          300        1.1875   0.28      0.28      0.452332  0.521888  20
          SoilCrop WheatSoil: LL=[0.261, 0.248, 0.28, 0.306, 0.36, 0.392, 0.446]; KL=[0.06, 0.06, 0.06, 0.04, 0.04, 0.02, 0.01]; XF=[1, 1, 1, 1, 1, 1, 1]
        SoilWater: SummerDate=1-Nov; SummerU=5; SummerCona=5; WinterDate=1-Apr; WinterU=5; WinterCona=5; DiffusConst=40; DiffusSlope=16; Salb=0.12; CN2Bare=73; CNRed=20; CNCov=0.8; max_pond=0; Thickness=[150, 150, 300, 300, 300, 300, 300]; SWCON=[0.3, 0.3, 0.3, 0.3, 0.3, 0.3, 0.3]
        Organic: FOMCNRatio=40
          Thickness  Carbon  SoilCNRatio  FBiom  FInert  FOM
          150        1.2     12           0.04   0.4     347.129
          150        0.96    12           0.02   0.6     270.344
          300        0.6     12           0.02   0.8     163.972
          300        0.3     12           0.02   1       99.4541
          300        0.18    12           0.01   1       60.322
          300        0.12    12           0.01   1       36.5871
          300        0.12    12           0.01   1       22.1912
        Chemical
          Thickness  NO3N  NH4N  PH
          150        1     0.1   8
          150        1     0.1   8
          300        1     0.1   8
          300        1     0.1   8
          300        1     0.1   8
          300        1     0.1   8
          300        1     0.1   8
        InitialWater: PercentMethod=1; FractionFull=1
        Sample InitialN: Thickness=[150, 150, 300, 300, 300, 300, 300]; SWUnits=Volumetric; OCUnits=Total; PHUnits=Water
        CERESSoilTemperature
        Nutrient
          DirectedGraphInfo={Nodes=[{Name=Inert, OutlineColour=Black}, {Name=SurfaceResidue, OutlineColour=Black}, {Name=FOMLignin, OutlineColour=Black}, {Name=FOMCellulose, OutlineColour=Black}, {Name=FOMCarbohydrate, OutlineColour=Black}, {Name=Microbial, OutlineColour=Black}, {Name=Humic, OutlineColour=Black}, {Name=Urea, OutlineColour=Black}, {Name=NO3, OutlineColour=Black}, {Name=NH4, OutlineColour=Black}, {Name=Atmosphere, OutlineColour=White}, {Name=PlantAvailableNO3, OutlineColour=Black}, {Name=PlantAvailableNH4, OutlineColour=Black}], Arcs=[{SourceName=SurfaceResidue, DestinationName=Microbial}, {SourceName=SurfaceResidue, DestinationName=Humic}, {SourceName=FOMLignin, DestinationName=Microbial}, {SourceName=FOMLignin, DestinationName=Humic}, {SourceName=FOMCellulose, DestinationName=Microbial}, {SourceName=FOMCellulose, DestinationName=Humic}, {SourceName=FOMCarbohydrate, DestinationName=Microbial}, {SourceName=FOMCarbohydrate, DestinationName=Humic}, {SourceName=Microbial, DestinationName=Microbial}, {SourceName=Microbial, DestinationName=Humic}, {SourceName=Humic, DestinationName=Microbial}, {SourceName=Urea, DestinationName=NH4}, {SourceName=NO3, DestinationName=Atmosphere}, {SourceName=NH4, DestinationName=NO3}]}
      Report ReportSimple: EventNames=[Clock].EndOfDay
        VariableNames:
          [Clock].Today
          [Weather].Rain as DailyRainfall
          [Wheat].Grain.Total.Wt
          [SowingRule].Script.SowingDepth
          [Weather].MaxT as MaxT
          Min of [Weather].MaxT from [ReportSimple].DayAfterLastOutput to [Clock].Today as TestMaxT
      Report ReportOnEvents
        VariableNames:
          [Clock].Today
          [Wheat].AboveGroundLive.Wt
          Sum([Soil].Nutrient.MineralN)
          [Wheat].Phenology.CurrentPhaseName
          [Irrigation].IrrigationApplied
          [Fertiliser].NitrogenApplied
        EventNames:
          [Wheat].Sowing
          [Wheat].Flowering
          [Wheat].Harvesting
          [Wheat].Phenology.PhaseChanged
          [Irrigation].Irrigated
          [Fertiliser].Fertilised
      Report ReportOnSpecificDaysEveryYear
        VariableNames:
          [Clock].Today
          [Wheat].AboveGroundLive.Wt
      Report ReportOnSpecificDates
        VariableNames:
          [Clock].Today
          [Wheat].AboveGroundLive.Wt
      Report ReportArrays: EventNames=[Clock].EndOfDay
        VariableNames:
          [Clock].Today
          Sum([Soil].Thickness[1:3]) as DepthToBottomOfLayer3
          Sum([Soil].SoilWater.SWmm) as TotalWaterStored
          Sum([Soil].SoilWater.SWmm[1:2]) as WaterStoredTop2Layers
          Sum([Soil].SoilWater.SWmm[1:3]) as WaterStoredTop3Layers
          //Sum([Soil].SoilWater.SWmm[4:]) as WaterStoredLayer4AndBelow
          //Sum([Soil].SoilWater.SWmm[:6]) as WaterStoredDowntoLayer6
          Mean([Soil].Nutrient.NO3.ppm[1:4]) as MeanNO3ppmTop4Layers
          Min([Soil].Nutrient.NO3.ppm[1:4]) as MinNO3ppmTop4Layers
          Max([Soil].Nutrient.NO3.ppm[1:4]) as MaxNO3ppmTop4Layers
          Sum([Soil].Nutrient.Urea.kgha[1:3] + [Soil].Nutrient.NH4.kgha[1:3] + [Soil].Nutrient.NO3.kgha[1:3]) as MineralN
          Sum([Soil].Nutrient.Urea.kgha[1:3] + [Soil].Nutrient.NH4.kgha[1:3] + [Soil].Nutrient.NO3.kgha[1:3]) * 1000 / Sum([Soil].Thickness[1:3] ) as KgMinN_PerSoilMeter
      Report ReportDaily: EventNames=[Clock].EndOfDay
        VariableNames:
          [Clock].Today
          Sum of [Weather].MaxT from [ReportDaily].DayAfterLastOutput to [Clock].Today as SumDailyMaxT
          Avg of [Weather].MaxT from [ReportDaily].DayAfterLastOutput to [Clock].Today as MeanDailyMaxT  // note this is to be replaced with Mean rather than Avg
          Min of [Weather].MaxT from [ReportDaily].DayAfterLastOutput to [Clock].Today as MinDailyMaxT
          Max of [Weather].MaxT from [ReportDaily].DayAfterLastOutput to [Clock].Today as MaxDailyMaxT
          First of [Weather].MaxT from [ReportDaily].DayAfterLastOutput to [Clock].Today as FirstDailyMaxT
          Last of [Weather].MaxT from [ReportDaily].DayAfterLastOutput to [Clock].Today as LastDailyMaxT
          Diff of [Weather].MaxT from [ReportDaily].DayAfterLastOutput to [Clock].Today as DiffDailyMaxT
      Report ReportWeekly: EventNames=[Clock].EndOfWeek
        VariableNames:
          [Clock].Today
          Sum of [Weather].MaxT from [ReportWeekly].DayAfterLastOutput to [Clock].Today as SumWeeklyMaxT
          Avg of [Weather].MaxT from [ReportWeekly].DayAfterLastOutput to [Clock].Today as MeanWeeklyMaxT  // note this is to be replaced with Mean rather than Avg
          Min of [Weather].MaxT from [ReportWeekly].DayAfterLastOutput to [Clock].Today as MinWeeklyMaxT
          Max of [Weather].MaxT from [ReportWeekly].DayAfterLastOutput to [Clock].Today as MaxWeeklyMaxT
          First of [Weather].MaxT from [ReportWeekly].DayAfterLastOutput to [Clock].Today as FirstWeeklyMaxT
          Last of [Weather].MaxT from [ReportWeekly].DayAfterLastOutput to [Clock].Today as LastWeeklyMaxT
          Diff of [Weather].MaxT from [ReportWeekly].DayAfterLastOutput to [Clock].Today as DiffWeeklyMaxT
      Report ReportMonthly: EventNames=[Clock].EndOfMonth
        VariableNames:
          [Clock].Today
          Sum of [Weather].MaxT from [ReportMonthly].DayAfterLastOutput to [Clock].Today as SumMonthlyMaxT
          Avg of [Weather].MaxT from [ReportMonthly].DayAfterLastOutput to [Clock].Today as MeanMonthlyMaxT  // note this is to be replaced with Mean rather than Avg
          Min of [Weather].MaxT from [ReportMonthly].DayAfterLastOutput to [Clock].Today as MinMonthlyMaxT
          Max of [Weather].MaxT from [ReportMonthly].DayAfterLastOutput to [Clock].Today as MaxMonthlyMaxT
          First of [Weather].MaxT from [ReportMonthly].DayAfterLastOutput to [Clock].Today as FirstMonthlyMaxT
          Last of [Weather].MaxT from [ReportMonthly].DayAfterLastOutput to [Clock].Today as LastMonthlyMaxT
          Diff of [Weather].MaxT from [ReportMonthly].DayAfterLastOutput to [Clock].Today as DiffMonthlyMaxT
      Report ReportYearly: EventNames=[Clock].EndOfYear
        VariableNames:
          [Clock].Today
          Sum of [Weather].MaxT from [ReportYearly].DayAfterLastOutput to [Clock].Today as SumYearlyMaxT
          Avg of [Weather].MaxT from [ReportYearly].DayAfterLastOutput to [Clock].Today as MeanYearlyMaxT  // note this is to be replaced with Mean rather than Avg
          Min of [Weather].MaxT from [ReportYearly].DayAfterLastOutput to [Clock].Today as MinYearlyMaxT
          Max of [Weather].MaxT from [ReportYearly].DayAfterLastOutput to [Clock].Today as MaxYearlyMaxT
          First of [Weather].MaxT from [ReportYearly].DayAfterLastOutput to [Clock].Today as FirstYearlyMaxT
          Last of [Weather].MaxT from [ReportYearly].DayAfterLastOutput to [Clock].Today as LastYearlyMaxT
          Diff of [Weather].MaxT from [ReportYearly].DayAfterLastOutput to [Clock].Today as DiffYearlyMaxT
      Report ReportSimulation: EventNames=[Clock].EndOfSimulation
        VariableNames:
          [Clock].Today
          Sum of [Weather].MaxT from [ReportSimulation].DayAfterLastOutput to [Clock].Today as SumSimulationMaxT
          Avg of [Weather].MaxT from [ReportSimulation].DayAfterLastOutput to [Clock].Today as MeanSimulationMaxT  // note this is to be replaced with Mean rather than Avg
          Min of [Weather].MaxT from [ReportSimulation].DayAfterLastOutput to [Clock].Today as MinSimulationMaxT
          Max of [Weather].MaxT from [ReportSimulation].DayAfterLastOutput to [Clock].Today as MaxSimulationMaxT
          First of [Weather].MaxT from [ReportSimulation].DayAfterLastOutput to [Clock].Today as FirstSimulationMaxT
          Last of [Weather].MaxT from [ReportSimulation].DayAfterLastOutput to [Clock].Today as LastSimulationMaxT
          Diff of [Weather].MaxT from [ReportSimulation].DayAfterLastOutput to [Clock].Today as DiffSimulationMaxT
  Folder Reporting Basics
    Memo Reporting Basics
      Setting up outputs from a simulation requires describing **what** to output and **when** that should be done.

      ## Properties - setting up what should be reported

      Figure 1 shows a screen capture of a simple report. The upper box (Properties) holds descriptions of what should be reported. The general syntax is:

      			[Model].Variable
      The first part, "[Model]" just above, gives the name of a model in the simulation. Models are almost any component in the simulation - e.g. Clock, Weather, Wheat, Irrigation - including Manager scripts (lthough these are a slightly special case and more on that below). The name of the model must be in square brackets. As with Manager scripts, Properties uses Intellisense to assist with constructing the output descripters. For example, see row 1 of Figure 1. After typing "[Clock]" once a "." is typed a drop-down list of possible variables will appear as hints and in Figure 1 the choice from the list was "Today" which gives the date of the simulation output.

      *Note that model and variable names are case-sensitive. Capitalisation in the right places is important.*

      The component "ReportSimple" shows four output examples (see also below). The second row (see also below) shows an example of relabelling the output (the "as DairyRainfall" text) - this simply allows the user to give a more relvant label for the output in the output file.

      			[Weather].Rain as DailyRainfall

      The third row shows that it may be necessary to work through several layers to get to the output wanted. In each case a "." after the variable name gives a list with hints for outputs.

      			[Wheat].Grain.Total.Wt

      The fourth row (also below) shows the special case of reporting an output from a Manager script. The first part ("[SowingRule]") is the name of the Mangager script (so the output text needs to say current with any name changes you might make). Outputs from Managers always need a ".Script" before Intellisense will show the possible outputs.

      			[SowingRule].Script.SowingDepth

      ## Reporting frequency - setting up when reports should happen

      Also needed is a specification of *when* an output should be made. The instruction for when to report is in the form of:

      			[Model].Event
      An Event is something that happens, like a stage of the day or a management action. The most-used example of a reporting frequency is:

      			[Clock].EndOfDay
      and this creates an output for every "EndOfDay" event - "EndOfDay" is an event created by Clock every day after all the models have done their calculations. Any (almost) event can be used to control the frequency of reporting such as:

      			[Wheat].Sowing
      			[Wheat].Flowering
      			[Wheat].Harvesting
      			[Wheat].PlantEnding
      			[Irrigation].Irrigated
      			[Fertiliser].Fertilised
      where “Wheat” might be any crop. This also shows that multiple triggers for reporting can be used.

      It is worth noting that when an event is used to trigger reporting, the output happens immediately rather than at the end of the simulation day. If you are getting strange outupts then consider this as a possible reason. To understand more about what order models do their calculations see https://apsimnextgeneration.netlify.com/development.

      ## Reporting at irregular intervals or specific dates

      If reporting is needed for particular days (e.g. to compare against measurements in an experiment) a combination of a Manager and a Report component. An example of such a Manager (ReportHelper) and two Report components (ReportOnSpecificDaysEveryYear and ReportOnSpecificDates) are included in this example. Note that when using a Manager to control reporting, the Report frequency in the Report component should be left blank.

      [Note that an Operations component could also be used to trigger irregular reporting dates.]
  Folder Dealing with output arrays
    Memo Reporting Arrays
      Several of the outputs from APSIM are arrays - water content in the soil layers is a good example of this - and there are some features that make reporting arrays easier in APSIM.

      To report all elements of an array, the syntax is the same as reporting a single variable. See for example in Row 2 of "ReportArrays the text

      			[Soil].SoilWater.SWmm
      produces one column of output for each element (soil layer) in the array. When a particular layer is wated then specify that in square brackets so the "[1]" is the top (closest to the soil surface) layer. For example,

      			[Soil].SoilWater.SWmm[1] as TopLayerWater_mm

      More often some sort of aggregation is in the array is wanted and for this it is necessary to specify both which elements of the array are to be aggregated and what type of aggregation is wanted.

      There are four options for specifying how the array elements should be aggregated - Sum, Mean, Min and Max - the meaning of these is self-evident. These are applied ot the array as, for example Mean(x) where the x is the output to be averaged. Use round brackets, capitalise the aggregation type and no spaces.

      For specifying how the aggregation is to work there are severla options. Giving no layer information at all includes all of the array. A range is specified as, for example [3:6] for the third to sixth (inclusive, here meaning four layers) layers. Giving the colon but no numerical value means from the first (e.g. [:5]) or to the last (e.g. [2:]) elements. Report will not indicate the depth of the layers but the user can either get this information from the Soil input or can output the data using [Soil].Thickness which is an array giving the thickness of each layer in mm.

      Some examples of possible array outputs to show the syntax are:

      			Sum([Soil].Thickness[1:3]) as DepthToBottomOfLayer3
      			Sum([Soil].SoilWater.SWmm) as TotalWaterStored
      			Sum([Soil].SoilWater.SWmm[1:2]) as WaterStoredTop2Layers
      			Sum([Soil].SoilWater.SWmm[1:3]) as WaterStoredTop3Layers
      			//Sum([Soil].SoilWater.SWmm[4:]) as WaterStoredLayer4AndBelow
      			//Sum([Soil].SoilWater.SWmm[:6]) as WaterStoredDowntoLayer6
      			Mean([Soil].Nutrient.NO3.ppm[1:4]) as MeanNO3ppmTop4Layers
      			Min([Soil].Nutrient.NO3.ppm[1:4]) as MinNO3ppmTop4Layers
      			Max([Soil].Nutrient.NO3.ppm[1:4]) as MaxNO3ppmTop4Layers

      Simple, element-by-element, array operations can be included in the specification. For example

      			[Soil].Nutrient.Urea.kgha + [Soil].Nutrient.NH4.kgha + [Soil].Nutrient.NO3.kgha
      will produce one column of data for each soil layer with the total of the amount of N as Urea, NH2 and NO3. Inserting

      			Sum([Soil].Nutrient.Urea.kgha[1:3] + [Soil].Nutrient.NH4.kgha[1:3] + [Soil].Nutrient.NO3.kgha[1:3]) as MineralN
      will give a single column of data with the total of Urea-N, NH4-N and NO3-N dfrom teh surface the the bottom of the third layer. These expressions can get more complex as in:

      			Sum([Soil].Nutrient.Urea.kgha[1:3] + [Soil].Nutrient.NH4.kgha[1:3] + [Soil].Nutrient.NO3.kgha[1:3]) * 1000 / Sum([Soil].Thickness[1:3] ) as KgMinN_PerSoilMeter
      which would give s single (somewhat nonsensical) output of the accumulation in mineral N with depth in the soil.
  Folder Reporting at Intervals Beyond Every Day
    Memo Reporting that is Aggregated in Time
      ***Note well** – reporting at aggregations other than every day can become complex. It is recommended that the results be critically evaluated to ensure that the reporting specified is as intended.*

      APSIM allows reporting at various intervals. Several of these methods have been described above. In addition to the usual [Clock].EndOfDay for daily reporting, [Clock] also has events of EndOfWeek, EndOfMonth, EndOfYear and EndOfSimulation. When the reporting is not every day then it is necessary to consider what the aggregation of the output should be. Some variables would usually be reported as their value on the day – many state variables (e.g. plant biomass) are like this. Others are almost always wanted to be summed over the interval since the last report – drainage and evaporation are good examples here.

      APSIM provides several ways to construct the aggregations. Not all the aggregations will be sensible for all outputs and it is up to the user to ensure the sensibility of the instructions to Report. For example, it makes no physical sense to sum the biomass of a plant in a monthly aggregation. It would make sense to report the value at the end of the month or to report the increase (difference) in biomass from the start to the end and it might make sense to report an average biomass. These issues must be considered when constructing more complex Report specifications. The general syntax of aggregated reporting is:

      			*AggregationType* of [Model].Variable from *Start* to *End* as Label

      The new elements here are *AggregationType*, *Start* and *End*.

      ##AggregationType
      AggregationType can be any of:

      -	Sum of

      -	Mean of

      -	Min of

      -	Max of

      -	First of

      -	Last of

      -	Diff of

      Most of these are self-evident. First and Last are chronological values. Diff is the increase in the output variable over the reporting interval – if the variable decreases then it will have a negative value.

      ##Start
      The most useful form of *Start* is *[ReportName].DateOfLastOutput* where the first part is the name of the current Report component. *DateOfLastOutput* is pretty much as stated. Other *Start* constructs might be a general, e.g. *1-jan*, or specific, e.g. *1-jan-1982*, date. *Start* can also be an event, e.g. *[Wheat].sowing* or *[Clock].StartOfYear*. When *Start* is a Clock or Report event the aggregation always starts at the start of the day. For events created by crop or other models the event can happen at any point of the day and it is not always clear without careful examination if the current-day calculations and updates will be included or excluded. This is user-beware.

      ##End
      *[Clock].Today* is the most useful *End* specification. This means that the end of the aggregation will be controlled by the Report frequency. *End* can also be an event, e.g. *[Wheat].Harvesting* or a general or specific date. As with *Start* and events, treat these with caution. Always consider the interaction between the aggregation interval and the report frequency. For example if the report frequency is *[Clock].EndOfMonth*:

      			Sum of [Weather].Rain from [Report].DateOfLastOutput to [Clock].Today
      will produce a monthly rainfall total while

      			Sum of [Weather].Rain from 1-jan to [Clock].Today
      will produce a cumulative rainfall as the months of the year progress and the accumulation will reset again on the next 1-Jan.

      ##Some examples
      The figures below show some aggregation examples of daily, weekly, monthly and annual aggregation reporting maximum temperature in various ways. Note that an aggregation to the end of the simulation is also possible. See the accompanying example *Report.apsimx* for details of these aggregations.
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