Simulations: Version=148
  Replacements
    Plant Rice: PlantType=Barley; IsAlive=false; IsEnding=false; DaysAfterEnding=0; ResourceName=Barley
      OrganArbitrator Arbitrator
        BiomassTypeArbitrator DMArbitration
          Folder PotentialPartitioningMethods
            ReallocationMethod
            AllocateFixationMethod
            RetranslocationMethod
            SendPotentialDMAllocationsMethod
          Folder AllocationMethods
            NutrientConstrainedAllocationMethod
            DryMatterAllocationsMethod
          RelativeAllocation ArbitrationMethod
        BiomassTypeArbitrator NArbitration
          Folder PotentialPartitioningMethods
            ReallocationMethod
          Folder ActualPartitioningMethods
            AllocateFixationMethod
            RetranslocationMethod
          Folder AllocationMethods
            NitrogenAllocationsMethod
          RelativeAllocation ArbitrationMethod
          AllocateUptakesMethod
        WaterUptakeMethod
        NitrogenUptakeMethod
      Phenology
        Memo
          Rice crop phenology responds to soil and climatic conditions with large genotypic variability.
          Temperature is driving development by increasing development rates and decreasing phase durations as temperatures change.  These impacts are captured by thermal time computed with cardinal temperatures that are variable for different crop development and growth processes. Rice in contrast to barley do not exhibit vernalisation  but for some varieties photoperiod sensitivities in the EarlyReproducivePhase may occur.  Photoperiod responses are seen as a reduction in the length of a phase for a photoperiod sensitive genotype in response to a longer photoperiod ( susnhine duration  higher than an optimum day legth at 11.5 h). Based on previous representation for photoperiod varieties an increase in sunshine duration  from the optimum will result to decrease of rate of developement.

          For the present version of the model we will keep the Kirby Framework to capture photoperiod responses and provide nil parameter for the vernalisation.  This framework assumes that the timing of anthesis is a result of the timing of flag leaf/ panicle initiation and an additional thermal time passage from there to anthesis.  It also assumes the timing of flag leaf is a result of the Final Leaf Number which sets a target, and leaf appearance rate, which sets the rate of progress toward this target.  Leaf appearance rate is a function of Thermal time and a genotype specific Phyllochron that we will define constant at this stage for rice crop at 29dd

          Final Leaf Number (FLN) is modeled as the sum of three numbers:

          FLN = MinLeafNumber  + PhotoLeaves

          Where MinLeafNumber is the number of leaves that a rice crop will produce in the crops duration (before 2nd true leaf) and it is grown in optimal photoperiod conditions.  PhotoLeaves are the number of leaves that are added to the minimum leaf number  that are growing during the period the crop is photoperiod sensitive as a result of exposure to day with sunshine duration higher than the optimal set at 8-14.  For insensitive varieties rate of developement of photoleaves are the same as optimum rate, for more sensitivie varieties as day length increases the growth rate of these leaves are reducing increasing duration of the period to anthesis.  More detailed explainations of the components of phenology are provided in the different components of the module.
        HourlyInterpolation ThermalTime: agregationMethod=0
          XYPairs Response: X=[8, 30, 42.5]; Y=[0, 22, 0]
          Memo
            Thermal time determines the rate of developmental progress through many of the crops phases and is used by organs to determing potential growth rates.
          ThreeHourSin InterpolationMethod
        PhotoperiodFunction Photoperiod: Twilight=-6; DayLength=0
        PhaseLookup PerceivedPhotoPeriod
          PhaseLookupValue ApexBelowGround: Start=Germination; End=TerminalSpikelet
            Constant Photoperiod: FixedValue=0; Units=h
          PhaseLookupValue ApexAboveGround: Start=TerminalSpikelet; End=Flowering
            VariableReference Photoperiod: VariableName=[Phenology].Photoperiod
        Constant MinimumLeafNumber: FixedValue=10; Units=Leaves
          Memo
            Number of leaves the plant will produce  with no photoperiod effect and grown at an optimum photoperiod 8-12h
        Constant PpSensitivity: FixedValue=4; Units=Leaves
          Memo
            The reduction in leaf rate appearance is function of day length optimum at 12 h and it will decrease if photoperios is higher than 12h
        Constant EarlyReproductivePpSensitivity: FixedValue=3
          Memo
            The phyllochrons duration for the plant to go from leaf 10 to flag leaf ligual appearance at > 12 h Pp compared  is the same as the lower leaves with phyllochron duration  multiply by a photoperiod sensitive factor  with an increase of duration up to three times of the current duration ( from 60 to 180 d, further longer duration means the crop cannot flower with the current condition). Sensitivity to photoperiod factor range then from 0 to 0.1.
        GerminatingPhase Germinating: Start=Sowing; End=Germination
          Memo
            Germination is only dependent to temperature as light and soil moisture is not limiting. Germination is set to happen without particular process in place set as S0 and same timeline as seeding.
            An option allowing germination to delay under a conditions of soil temperature and soil moisture should be accounted and particularly for direct seeded rice using non pregerminating seed.
            In the present model we set the standard to be 0 for germinated seed sowing.
        EmergingPhase Emerging: ShootLag=40; ShootRate=1; Start=Germination; End=Emergence; TTForTimeStep=0
          VariableReference ThermalTime: VariableName=[Phenology].ThermalTime
          Memo
            Emergence is only dependent to temperature as light and soil moisture is not limiting. Emergence is function of seeding depth and the rate of elongation of the coleoptile  that is to happen within a standard thermal time target of 40dd.
            An option allowing emergence to delay under a conditions of soil compaction and a function of elongation rate to be driven by soil temperature should be accounted and particularly for direct seeded rice using non or pregerminating seed.
            In the present model we set the thermal time target to be 40 with an elongation rate of 1 cm /d. To be referenced.
            The current representation allows a period of 5 d in average between germination and Emergence. Variability of duration of emergence vary with sowing depth and conditions of soil moisture and physical structure.
        GenericPhase BasicVegetative: Start=Emergence; End=TerminalSpikelet
          Memo
            The duration of the vegetative phase is set by a target thermal time target for basic vegetative stage for the first 9 leaves  and then the thermal time target of photoperiod sensitive stage for the next 4 leaves which determine the photoperiod sensitive stage which ends at the appearance of the flag leaf and starts at the same time with the formation of panicle which is the panicle initiation defined to be at the same time as the terminal spikelet stage. This denomination may need to be changed is to set terminal spikelet stage as panicle initiation for rice crop.
          VariableReference Progression: VariableName=[Phenology].ThermalTime
          MultiplyFunction Target
            VariableReference Phyllochron: VariableName=[Structure].MeanPhyllochron
            VariableReference HSTS: VariableName=[Structure].HaunStageTerminalSpikelet
          Memo Memo1
            Panicle initiation is delayed as the photoperido phase is increasng with longer day duration increasing the duration of the Vegetative phase
        GerminatingPhase Panicledevelopement: Start=TerminalSpikelet; End=PanicleInitiation
          Memo
            This is a phase to divide vegetative stage and reproductive stage as early reproductive stage is overlapping with the basic vegetative stage.
        LeafAppearancePhase StemElongation: Start=PanicleInitiation; End=FlagLeaf
          Memo
            The Final leaf number is fixed  and it is reached at the start of panicle initiation.Leaves will continue  to expand and appear on other tillers at a rate set by thermal time and phyllochron until flag leaf liguale  which is the final leaf appearing  indicating  vegetative stage is completed. The elongation of stem from that stage is leading to terminal spikelet which is equivalent of heading in rice crop.
          VariableReference ThermalTime: VariableName=[Phenology].ThermalTime
          VariableReference FinalLeafNumber: VariableName=[Structure].FinalLeafNumber
          ExpressionFunction LeafNumber
            Expression=[Leaf].ExpandedCohortNo + [Leaf].NextExpandingLeafProportion
          VariableReference FullyExpandedLeafNo: VariableName=[Leaf].ExpandedCohortNo
          VariableReference InitialisedLeafNumber: VariableName=[Leaf].InitialisedCohortNo
        GenericPhase EarlyReproductive: Start=FlagLeaf; End=Flowering
          VariableReference Progression: VariableName=[Phenology].ThermalTime
          MultiplyFunction Target
            AddFunction Phyllochrons
              VariableReference LongDayBase: VariableName=[Phenology].EarlyReproductiveLongDayBase
              MultiplyFunction IncreaseDueToShortPhotoPeriod
                LinearInterpolationFunction PhotoPeriodResponse
                  XYPairs: X=[0, 8, 10, 12, 14]; Y=[1, 1, 1, 1, 1]
                  VariableReference XValue: VariableName=[Phenology].Photoperiod
                VariableReference PpSensitivity: VariableName=[Phenology].EarlyReproductivePpSensitivity
            VariableReference Phyllochron: VariableName=[Structure].MeanPhyllochron
        GenericPhase GrainDevelopment: Start=Flowering; End=StartGrainFill
          Constant Target: FixedValue=10
          VariableReference Progression: VariableName=[Phenology].ThermalTime
        GenericPhase GrainFilling: Start=StartGrainFill; End=EndGrainFill
          Constant Target: FixedValue=500
          VariableReference Progression: VariableName=[Phenology].ThermalTime
        GenericPhase Maturing: Start=EndGrainFill; End=Maturity
          Constant Target: FixedValue=50
          VariableReference Progression: VariableName=[Phenology].ThermalTime
        GenericPhase Ripening: Start=Maturity; End=HarvestRipe
          Constant Target: FixedValue=10
          VariableReference Progression: VariableName=[Phenology].ThermalTime
        EndPhase ReadyForHarvesting: Start=HarvestRipe; End=Unused
          VariableReference ThermalTime: VariableName=[Phenology].ThermalTime
        ZadokPMF Zadok
        OnEventFunction FlagLeafDAS: SetEvent=FlagLeaf; ReSetEvent=never
          Memo
            A function is used to provide flowering date as days after sowing(DAS).
          Constant PreEventValue: FixedValue=0
          VariableReference PostEventValue: VariableName=[Plant].DaysAfterSowing
        OnEventFunction FloweringDAS: SetEvent=Flowering; ReSetEvent=never
          Memo
            A function is used to provide flowering date as days after sowing(DAS).
          Constant PreEventValue: FixedValue=0
          VariableReference PostEventValue: VariableName=[Plant].DaysAfterSowing
        OnEventFunction MaturityDAS: SetEvent=Maturity; ReSetEvent=never
          Memo
            A function is used to provide maturity date as days after sowing(DAS).
          Constant PreEventValue: FixedValue=0
          VariableReference PostEventValue: VariableName=[Plant].DaysAfterSowing
        Constant EarlyReproductiveLongDayBase: FixedValue=1
          Memo
            The phyllochrons duration for the plant to go from flag leaf ligual appearance at 16 h Pp.
      Structure: CohortInitialisationStage=Germination; LeafInitialisationStage=Emergence
        Memo Memo1
          Rice crop phenology is dependent of  genotypic factors and environmental factors of climate and soil  but as well of management such seeding depth and seeding rate.
          Temperature has effect on rice plant development with increasing development rates and decreasing phase durations as temperatures change.  These affects are captured by thermal time.  In contrast of barley crop exhibiting vernalisation, rice crop onpy exhibits photoperiod sensitivities in its Vegetative phase and further photoperiod sensitivity in the EarlyReproducivePhase.  Photoperiod responses are seen as a reduction in the length of a phase for a photoperiod sensitive genotype in response to a longer photoperiod or a shorter photoperiod beyond the optimum.  For sensitive varieties, exposure to short photoperiods during the Vegetative phase will reduce the thermal time duration of the vegetative phase.

          We draw on the Kirby Framework to capture the photoperiod responses.  This framework assumes that the timing of anthesis is a result of the timing of flag leaf and an additional thermal time passage from there to anthesis.  It also assumes the timing of flag leaf is a result of the Final Leaf Number which sets a target, and leaf appearance rate, which sets the rate of progress toward this target.  Leaf appearance rate is a function of Thermal time and a genotype specific Phyllochron which changes with Haun stage as described by [Jamieson_LeafAppearance_1995].

          Final Leaf Number (FLN) is modeled as the sum of three numbers:

          FLN = MinLeafNumber + PhotoLeaves

          Where MinLeafNumber is the number of leaves that a rice crop will produce during its non photoperiod phase under optimal conditions at an optimal rate (600dd). PhotoLeaves are the number of leaves that are added to the minimum leaf number produced during the photoperiod  senitive phase  of a crop. Growth rate of these leaves are optimal under optimal conditions  but as a result of short day exposure, photoleaves growth rate is a function of optimal rate and a multiplying factor reducing the rate for slower rate as result of shorter daylength.  For insensitive varieties this factor will  be 1 but is potential lower for more sensitive varieties as day length decrease.  Photoperiod phase is the phase after the 9th leaf  appearance and impacting the remaining four leaves including the flag leaf( ~ 600dd)
        VariableReference ThermalTime: VariableName=[Phenology].ThermalTime
        MultiplyFunction Phyllochron
          Memo Rational
            This is the thermal time between the emergence of leaf tips where leaf appearace is described by a base phyllochron determined between leaves 2 and 7 and a phyllochron that was 70% of base phyllochron for leaves < 2 and 130% of base phyllochron for leaves > 7 ([Jamieson_SIRIUS_1998]).  There is also a photoperiod effect to give larger phyllochrons in longer photoperiods which i sin contrast for Barley crop with larger phyllochrons in shorter photoperiod.
             The basephyllochron is set at 90dd.
          LinearInterpolationFunction LeafStageFactor
            XYPairs: X=[0, 2, 6, 9, 12, 14]; Y=[0.7, 0.7, 1, 1, 1.3, 1.3]
            VariableReference XValue: VariableName=[Leaf].AppearedCohortNo
          Constant BasePhyllochron: FixedValue=90; Units=oC.d
          LinearInterpolationFunction PhotoPeriodEffect
            XYPairs: X=[6, 8, 12, 14, 16]; Y=[1, 1, 1, 1, 1]
            VariableReference XValue: VariableName=[Phenology].Photoperiod
            Memo Memo_pp
              Rice is a short photoperiod crop which when exposes to long day photoperiod  experiences a delay in anthesis. Photoperiod sensitive variety  has then an increased phyllochron for leaf growth during its photoperiod sensitive stage which corresponds to the period when the last 4 leaves of the main stem develop. With the gradient of sensitivity of the variety the needed dd for that period to complete increase with a factor ranging from 1  for non sensitive variety to up to a gradient of responses of the linear relationship between xy of the photoperiod effect defined as genotyic specific. A highly sensitive variety will have a photoperiod effect as below: 8/1/ 10/1 12/1 14/2/16/6
        MultiplyFunction BranchingRate
          Memo
            Potential branching rate is determined by the commonly observed pattern of tillering in barley adapted to rice crop, in which each tiller emerges with the third leaf on its parent axis (e.g. first tiller emerges at the same time as the third leaf on the main stem, the first secondary tiller appears with the third leaf on tiller 1).  This is described as a simple function of main stem leaf number.
            If we assume the plant will emerge 13 phytomeres with a potential of 182 leaves from 60 tillers at an optimum seeding rate of 50pl/m2
          PhaseLookup PotentialBranchingRate
            PhaseLookupValue Vegetative: Start=Emergence; End=FlagLeaf
              LinearInterpolationFunction PotentialBranchingRate
                XYPairs: X=[1, 1.9, 2, 3, 6, 7]; Y=[0, 0, 1, 2, 12, 27]
                VariableReference XValue: VariableName=[Structure].LeafTipsAppeared
            PhaseLookupValue Reproductive: Start=FlagLeaf; End=HarvestRipe
              Constant Zero: FixedValue=0
          MinimumFunction StressFactors
            LinearInterpolationFunction NitrogenEffect
              Memo
                Inadequate Nitrogen supply is assumed to affect tillering prior to any effect on photosynthesis or leaf size.
              XYPairs: X=[0.5, 2, 3]; Y=[0.1, 1, 1]
              VariableReference XValue: VariableName=[Arbitrator].FN
            LinearInterpolationFunction CoverEffect
              Memo
                Tillering is said to cease once a threshold fraction of incoming radiation has been achieved to captures shading effects on tillering ([evers2006cessation]).
              XYPairs: X=[0, 0.35, 0.5]; Y=[1, 1, 0.1]
              VariableReference XValue: VariableName=[Leaf].CoverTotal
            LinearInterpolationFunction WaterStressEffect
              XYPairs: X=[0, 0.7, 1]; Y=[0, 1, 1]
              VariableReference XValue: VariableName=[Root].PlantWaterPotentialFactor
        PhaseLookup BranchMortality
          PhaseLookupValue MortalityPhase: Start=PanicleInitiation; End=Flowering
            MultiplyFunction Mortality
              LinearInterpolationFunction MortalityPerDegDay
                XYPairs: X=[0, 0.005]; Y=[0.004, 0]
                VariableReference XValue: VariableName=[Structure].MeanTillerGrowthRate
              VariableReference ThermalTime: VariableName=[Phenology].ThermalTime
        HeightFunction HeightModel
          LinearInterpolationFunction PotentialHeight
            XYPairs: X=[3, 4, 5, 6, 7]; Y=[10, 200, 1000, 1100, 1200]
            VariableReference XValue: VariableName=[Phenology].Stage
          LinearInterpolationFunction WaterStress
            XYPairs: X=[0.3, 0.7, 1]; Y=[0.1, 1, 1]
            VariableReference XValue: VariableName=[Leaf].Fw
        MovingAverageFunction MeanTillerGrowthRate: NumberOfDays=5; StageToStartMovingAverage=Emergence
          Memo
            This is calculated to represent the supply of asslimilate to individual tillers over the past 5 days to use as an index to determine tiller mortality.  When tiller numbers are high or total crop assimilate supply is small there will not be enough assimilate to maintain all of the tillers so the model will senesce some.
          DivideFunction TillerGrowthRate
            VariableReference DailyGrowth: VariableName=[Arbitrator].DM.TotalFixationSupply
            VariableReference ThermalTime: VariableName=[Phenology].ThermalTime
            VariableReference StemPopulation: VariableName=[Structure].TotalStemPopn
        MovingAverageFunction MeanPhyllochron: NumberOfDays=90; StageToStartMovingAverage=Emergence
          VariableReference Phyllochron: VariableName=[Structure].Phyllochron
        HoldFunction FinalLeafNumber: WhenToHold=FlagLeaf
          AddFunction FinalNodeNumber
            VariableReference MinLeafNumber: VariableName=[Phenology].MinimumLeafNumber
            MultiplyFunction VernalLeaves
              VariableReference UnVernalisedLeaves: VariableName=[Phenology].VrnSensitivity
              SubtractFunction VernalisationReductionFactor
                Constant One: FixedValue=1
                VariableReference RelativeVrn1Expression: VariableName=[Phenology].Vrn1
            MultiplyFunction PhotoPLeaves
              VariableReference ShortPpLeaves: VariableName=[Phenology].PpSensitivity
              LinearInterpolationFunction PhotoPeriodReductionFactor
                XYPairs: X=[8, 12, 16]; Y=[1, 1, 1]
                VariableReference XValue: VariableName=[Phenology].Photoperiod
        ExpressionFunction HaunStageTerminalSpikelet: Expression=[Structure].FinalLeafNumber-4
          Memo
            The rice phenology described followed the Haun stage description assuming that Terminal Spikelet is the equivalent of panicle initiation which occurs  when the first of the last four leaves of the crop  is initiated which allows to keep the same apporach in determining termial spikelet in barley as the approach developped for Barley by Brown et al 2013 updated with parameters estimated from  the data of Veragara and Chang 1985.
        AddFunction HaunStage
          VariableReference AppearedLeaves: VariableName=[Leaf].ExpandedCohortNo
          VariableReference ProportionOfExpandingLeaf: VariableName=[Leaf].NextExpandingLeafProportion
        Constant StemSenescenceAge: FixedValue=0
      ReproductiveOrgan Grain: GrowthRespiration=0; MaintenanceRespiration=0; RipeStage=Ripe
        Biomass Live
        Biomass Dead
        HoldFunction NumberFunction: WhenToHold=Flowering
          MultiplyFunction GrainNumber
            Constant GrainsPerGramOfStem: FixedValue=650; Units=grains
            VariableReference StemMass: VariableName=[StemPlusSpike].Wt
            Memo Memo1
              Nbr grains per gram of stem is 65000gr per kg of above ground biomass which is then of 65gr per g of above ground biomass which is an intermediate variable reported in  hg the unit of StemMass of reference.
              Maximum Weight of 1 gr ranged between 24-25mg which may present some genotypic variability.
        Constant InitialGrainProportion: FixedValue=0.05
        Constant MaximumPotentialGrainSize: FixedValue=0.025; Units=g
        PhaseLookup DMDemandFunction
          PhaseLookupValue InitialPhase: Start=PanicleInitiation; End=Flowering
            FillingRateFunction
              VariableReference NumberFunction: VariableName=[Grain].NumberFunction
              VariableReference FillingDuration: VariableName=[Phenology].EarlyReproductive.Target
              VariableReference ThermalTime: VariableName=[Phenology].ThermalTime
              MultiplyFunction PotentialSizeIncrement
                VariableReference InitialProportion: VariableName=[Grain].InitialGrainProportion
                VariableReference MaximumSize: VariableName=[Grain].MaximumPotentialGrainSize
          PhaseLookupValue LinearPhase: Start=Flowering; End=EndGrainFill
            FillingRateFunction
              VariableReference NumberFunction: VariableName=[Grain].NumberFunction
              VariableReference FillingDuration: VariableName=[Phenology].GrainFilling.Target
              VariableReference ThermalTime: VariableName=[Phenology].ThermalTime
              MultiplyFunction PotentialSizeIncrement
                SubtractFunction ProportionLinearPhase
                  Constant One: FixedValue=1
                  VariableReference InitialProportion: VariableName=[Grain].InitialGrainProportion
                VariableReference MaximumSize: VariableName=[Grain].MaximumPotentialGrainSize
        Constant MinimumNConc: FixedValue=0.01
        Constant MaxNConcDailyGrowth: FixedValue=0.0175
        Constant MaximumNConc: FixedValue=0.0175
        PhaseLookup NFillingRate
          PhaseLookupValue GrainFilling: Start=Flowering; End=EndGrainFill
            FillingRateFunction
              VariableReference NumberFunction: VariableName=[Grain].NumberFunction
              AddFunction FillingDuration
                VariableReference FloweringToGrainFilling: VariableName=[Phenology].GrainDevelopment.Target
                VariableReference GrainFilling: VariableName=[Phenology].GrainFilling.Target
              VariableReference ThermalTime: VariableName=[Phenology].ThermalTime
              MultiplyFunction PotentialSizeIncrement
                VariableReference MaximumSize: VariableName=[Grain].MaximumPotentialGrainSize
                VariableReference MaximumNConc: VariableName=[Grain].MaximumNConc
        Constant WaterContent: FixedValue=0.14
        AccumulateFunction AccumThermalTime: StartStageName=Flowering; EndStageName=Maturity; FractionRemovedOnCut=0; FractionRemovedOnHarvest=0; FractionRemovedOnGraze=0; FractionRemovedOnPrune=0
          VariableReference DailyThermalTimeValue: VariableName=[Phenology].ThermalTime
        ExpressionFunction Protein
          Expression=([Grain].Live.N + [Grain].Dead.N)/([Grain].Live.Wt + [Grain].Dead.Wt) * 100 * 6.25
        BiomassRemoval BiomassRemovalDefaults
          OrganBiomassRemovalType Harvest: FractionLiveToRemove=1; FractionDeadToRemove=0; FractionLiveToResidue=0; FractionDeadToResidue=0
          OrganBiomassRemovalType Cut: FractionLiveToRemove=1; FractionDeadToRemove=0; FractionLiveToResidue=0; FractionDeadToResidue=0
          OrganBiomassRemovalType Prune: FractionLiveToRemove=0; FractionDeadToRemove=0; FractionLiveToResidue=0.8; FractionDeadToResidue=0
          OrganBiomassRemovalType Graze: FractionLiveToRemove=0.6; FractionDeadToRemove=0; FractionLiveToResidue=0.2; FractionDeadToResidue=0
          OrganBiomassRemovalType Thin: FractionLiveToRemove=0; FractionDeadToRemove=0; FractionLiveToResidue=0.05; FractionDeadToResidue=0
        Constant DMConversionEfficiency: FixedValue=1
        Constant RemobilisationCost: FixedValue=0
        Constant CarbonConcentration: FixedValue=0.4
        BiomassDemand DMDemandPriorityFactors
          Constant Structural: FixedValue=1
          Constant Metabolic: FixedValue=1
          Constant Storage: FixedValue=1
        BiomassDemand NDemandPriorityFactors
          Constant Structural: FixedValue=1
          Constant Metabolic: FixedValue=1
          Constant Storage: FixedValue=1
      Root: GrowthRespiration=0; MaintenanceRespiration=0
        RootShapeCylinder RootShape
        Constant KLModifier: FixedValue=1
        Constant SoilWaterEffect: FixedValue=1
        Constant MaxDailyNUptake: FixedValue=8
        Constant SenescenceRate: FixedValue=0.005
        Constant MaximumRootDepth: FixedValue=1000000
        Constant MaximumNConc: FixedValue=0.02
        Constant MinimumNConc: FixedValue=0.01
        PhaseLookupValue NitrogenDemandSwitch: Start=Germination; End=Maturity
          Constant: FixedValue=1
        BiomassRemoval BiomassRemovalDefaults
          OrganBiomassRemovalType Harvest: FractionLiveToRemove=0; FractionDeadToRemove=0; FractionLiveToResidue=0.2; FractionDeadToResidue=0
          OrganBiomassRemovalType Cut: FractionLiveToRemove=0; FractionDeadToRemove=0; FractionLiveToResidue=0.3; FractionDeadToResidue=0
          OrganBiomassRemovalType Prune: FractionLiveToRemove=0; FractionDeadToRemove=0; FractionLiveToResidue=0.1; FractionDeadToResidue=0
          OrganBiomassRemovalType Graze: FractionLiveToRemove=0; FractionDeadToRemove=0; FractionLiveToResidue=0.15; FractionDeadToResidue=0
          OrganBiomassRemovalType Thin: FractionLiveToRemove=0; FractionDeadToRemove=0; FractionLiveToResidue=0.05; FractionDeadToResidue=0
        Constant KNO3: FixedValue=0.02
        Constant KNH4: FixedValue=0.01
        Constant SpecificRootLength: FixedValue=1500; Units=m/g
        MultiplyFunction RootFrontVelocity
          PhaseLookup PotentialRootFrontVelocity
            PhaseLookupValue PreEmergence: Start=Germination; End=Emergence
              Constant Value: FixedValue=5; Units=mm/d
            PhaseLookupValue PostEmergence: Start=Emergence; End=Flowering
              Constant Value: FixedValue=10; Units=mm/d
          WeightedTemperatureFunction TemperatureFactor: MaximumTemperatureWeighting=0.5
            XYPairs: X=[0, 15, 25, 35]; Y=[0, 1, 1, 0]
          LinearInterpolationFunction WaterFactor
            SoilWaterScale
            XYPairs: X=[0, 0.25, 1]; Y=[0, 1, 1]
            VariableReference XValue: VariableName=[SoilWaterScale]
        LinearInterpolationFunction NUptakeSWFactor
          SoilWaterScale
          XYPairs: X=[0, 1]; Y=[0, 1]
          Memo
            This is modelled in the same way as the  one used for Barley model where potential N uptake is decreased as the soil dries as described by NUptakeSWFactor. Improvement of thhsi model in Paddy environment  is to be considered.
          VariableReference XValue: VariableName=[SoilWaterScale]
        Constant DMConversionEfficiency: FixedValue=1
        Constant MaintenanceRespirationFunction: FixedValue=1
        Constant RemobilisationCost: FixedValue=0
        Constant CarbonConcentration: FixedValue=0.4
        BiomassDemandAndPriority DMDemands
          MultiplyFunction Structural
            PartitionFractionDemandFunction DMDemandFunction
              PhaseLookup PartitionFraction
                PhaseLookupValue PreEmergence: Start=Germination; End=Emergence
                  Constant Value: FixedValue=0
                PhaseLookupValue PreFlowering: Start=Emergence; End=Flowering
                  LinearInterpolationFunction AgeFactor
                    XYPairs: X=[3, 4]; Y=[0.5, 0.2]
                    VariableReference XValue: VariableName=[Phenology].Stage
                PhaseLookupValue PostFlowering: Start=Flowering; End=EndGrainFill
                  Constant Value: FixedValue=0.2
                  Memo
                     From flowering it is assumed that allocaton to root is  nil. Root system is maintained  under non-stressed conditions and subjected to senescence based on the age factor function.
            Constant StructuralFraction: FixedValue=1
          Constant Metabolic: FixedValue=0
          StorageDMDemandFunction Storage
            SubtractFunction StorageFraction
              Constant One: FixedValue=1
              VariableReference StructuralFraction: VariableName=[Root].DMDemands.Structural.StructuralFraction
          Constant QStructuralPriority: FixedValue=1
          Constant QMetabolicPriority: FixedValue=1
          Constant QStoragePriority: FixedValue=1
        BiomassDemandAndPriority NDemands
          MultiplyFunction Structural
            VariableReference MinNconc: VariableName=[Root].minimumNconc
            VariableReference PotentialDMAllocation: VariableName=[Root].potentialDMAllocation.Structural
          MultiplyFunction Metabolic
            SubtractFunction MetabolicNconc
              VariableReference CritNconc: VariableName=[Root].criticalNConc
              VariableReference MinNconc: VariableName=[Root].minimumNconc
            VariableReference PotentialDMAllocation: VariableName=[Root].potentialDMAllocation.Structural
          StorageNDemandFunction Storage
            VariableReference NitrogenDemandSwitch: VariableName=[Root].nitrogenDemandSwitch
            VariableReference MaxNconc: VariableName=[Root].maximumNconc
          Constant QStructuralPriority: FixedValue=1
          Constant QMetabolicPriority: FixedValue=1
          Constant QStoragePriority: FixedValue=1
        VariableReference CriticalNConc: VariableName=[Root].MinimumNConc
        BiomassDemand InitialWt
          Constant Structural: FixedValue=0.005; Units=g/plant
          Constant Metabolic: FixedValue=0
          Constant Storage: FixedValue=0
        Constant RootDepthStressFactor: FixedValue=1
      Leaf: MaxCover=1; Albedo=0.25; Gsmax350=0.011; R50=150; KDead=0.1; MaximumMainStemLeafNumber=120
        zero: CurrentExpandingLeaf, StartFractionExpanded, FractionNextleafExpanded, DeadNodesYesterday, GrowthRespiration, LAI, Depth, Width, FRGR, PotentialEP, WaterDemand, TipsAtEmergence, CohortsAtInitialisation, FractionDied
        LeafCohort InitialLeaves[1]: Rank=1; Area=200
          zero: NReallocationFactor, DMReallocationFactor, NRetranslocationFactor, DMRetranslocationFactor, ShadeInducedSenRate, SenescedFrac, DeltaPotentialArea, DeltaStressConstrainedArea, DeltaCarbonConstrainedArea, PotentialStructuralDMAllocation, PotentialMetabolicDMAllocation, MetabolicNReallocated, MetabolicWtReallocated, StorageNReallocated, StorageWtReallocated, MetabolicNRetranslocated, StorageNRetrasnlocated, DMRetranslocated, MetabolicNAllocation, StructuralDMAllocation, MetabolicDMAllocation, MaintenanceRespiration
        LeafCohort InitialLeaves[2]: Rank=2; Area=200
          zero: NReallocationFactor, DMReallocationFactor, NRetranslocationFactor, DMRetranslocationFactor, ShadeInducedSenRate, SenescedFrac, DeltaPotentialArea, DeltaStressConstrainedArea, DeltaCarbonConstrainedArea, PotentialStructuralDMAllocation, PotentialMetabolicDMAllocation, MetabolicNReallocated, MetabolicWtReallocated, StorageNReallocated, StorageWtReallocated, MetabolicNRetranslocated, StorageNRetrasnlocated, DMRetranslocated, MetabolicNAllocation, StructuralDMAllocation, MetabolicDMAllocation, MaintenanceRespiration
        LeafCohortParameters CohortParameters: ExpansionStressValue=0; CellDivisionStressValue=0; LagAccelerationValue=0; SenescenceAccelerationValue=0; ShadeInducedSenescenceRateValue=0; SenessingLeafRelativeSizeValue=0
          Constant NReallocationFactor: FixedValue=1
          Constant MaintenanceRespirationFunction: FixedValue=0
          Constant NRetranslocationFactor: FixedValue=0.03
          Constant DMReallocationFactor: FixedValue=1
          Constant DMRetranslocationFactor: FixedValue=0.03
          MinimumFunction CellDivisionStress
            LinearInterpolationFunction WaterStressEffect
              XYPairs: X=[0, 0.5, 0.7, 1]; Y=[0.5, 0.5, 1, 1]
              VariableReference XValue: VariableName=[Leaf].Fw
            LinearInterpolationFunction NitrogenStressEffect
              XYPairs: X=[0, 0.5, 0.9, 1]; Y=[0.1, 0.1, 1, 1]
              VariableReference XValue: VariableName=[Rice].Leaf.Fn
          MinimumFunction ExpansionStress
            LinearInterpolationFunction WaterStressEffect
              XYPairs: X=[0, 0.1, 0.5, 0.9, 1, 1.3]; Y=[0.5, 0.5, 0.5, 1, 1, 1]
              VariableReference XValue: VariableName=[Leaf].Fw
            LinearInterpolationFunction NitrogenStressEffect
              XYPairs: X=[0, 0.5, 0.7, 1]; Y=[0.1, 0.1, 1, 1]
              VariableReference XValue: VariableName=[Rice].Leaf.Fn
          MultiplyFunction MaxArea
            Constant AreaLargestLeaves: FixedValue=2000; Units=mm^2
            LinearInterpolationFunction AgeFactor
              XYPairs: X=[3, 3.6, 4.2, 5]; Y=[0.1, 0.5, 1, 0.4]
              Memo
                The AgeFactor has the effect of increasing leaf size from a minimum for the first leaf appeared to a maximum for leaves that appear soon after TerminalSpikelet and then decreasing again for leaves appearing between TerminalSpikelet and FlagLeaf
              VariableReference XValue: VariableName=[Phenology].Stage
          MultiplyFunction GrowthDuration
            Constant Multiplier: FixedValue=1.3
            VariableReference Phyllochron: VariableName=[Structure].Phyllochron
          MultiplyFunction LagDuration
            SubtractFunction LastLeafDuration
              AddFunction ThermalTimeToRipe
                VariableReference EarlyReproductive: VariableName=[Phenology].EarlyReproductive.Target
                VariableReference GrainDevelopment: VariableName=[Phenology].GrainDevelopment.Target
                VariableReference GrainFilling: VariableName=[Phenology].GrainFilling.Target
                VariableReference Maturing: VariableName=[Phenology].Maturing.Target
                VariableReference Ripening: VariableName=[Phenology].Ripening.Target
              VariableReference SenescenceDuration: VariableName=[Leaf].CohortParameters.SenescenceDuration
            LinearInterpolationFunction AgeFactor
              XYPairs: X=[3, 4.6, 5]; Y=[0.4, 1, 1]
              Memo
                The AgeFactor causes the later appeared leaves to remain at their maximum area for longer than the earlier leaves.
              VariableReference XValue: VariableName=[Phenology].Stage
          MultiplyFunction SenescenceDuration
            Constant Multiplier: FixedValue=2
            VariableReference Phyllochron: VariableName=[Structure].Phyllochron
          Constant DetachmentLagDuration: FixedValue=1000000
          Constant DetachmentDuration: FixedValue=1000000
          Constant RelativeBranchLeafSize: FixedValue=1
          LinearInterpolationFunction MaximumNConc
            XYPairs: X=[3, 4, 6]; Y=[0.07, 0.03, 0.03]
            VariableReference XValue: VariableName=[Phenology].Stage
          MultiplyFunction CriticalNConc
            LinearInterpolationFunction CriticalNConcAt350ppm
              XYPairs: X=[3, 4, 6]; Y=[0.04, 0.01, 0.01]
              VariableReference XValue: VariableName=[Phenology].Stage
            LinearInterpolationFunction CO2Factor
              XYPairs: X=[350, 700]; Y=[1, 0.93]
              VariableReference XValue: VariableName=[Weather].CO2
              Memo
                This is CO2 interaction with N leaf demand- To explore if this representation is sensitive to CO2 change.
          LinearInterpolationFunction MinimumNConc
            XYPairs: X=[3, 4, 6]; Y=[0.04, 0.01, 0.01]
            VariableReference XValue: VariableName=[Phenology].Stage
          AddFunction LagAcceleration
            Constant One: FixedValue=1
            MultiplyFunction Stress
              Constant StressResponseCoefficient: FixedValue=1
              LinearInterpolationFunction StressFactor
                XYPairs: X=[0, 1]; Y=[1, 0]
                VariableReference XValue: VariableName=[Leaf].Fw
          AddFunction SenescenceAcceleration: same as Replacements.Rice.Leaf.CohortParameters.LagAcceleration
          LinearInterpolationFunction SpecificLeafAreaMax
            XYPairs: X=[3, 4]; Y=[45000, 65000]
            VariableReference XValue: VariableName=[Phenology].Stage
          LinearInterpolationFunction SpecificLeafAreaMin
            XYPairs: X=[0.4, 1]; Y=[15000, 18000]
            VariableReference XValue: VariableName=[Leaf].Fn
          Constant InitialNConc: FixedValue=0
          Constant StructuralFraction: FixedValue=0.1
          Constant StorageFraction: FixedValue=0
          Constant LeafSizeShapeParameter: FixedValue=0.3
          Constant SenessingLeafRelativeSize: FixedValue=1; Units=0-1
          MultiplyFunction ShadeInducedSenescenceRate
            LinearInterpolationFunction CoverEffect
              XYPairs: X=[0, 0.9, 0.95, 1]; Y=[0, 0, 0.01, 0.03]
              VariableReference XValue: VariableName=[Leaf].CohortCurrentRankCoverAbove
            VariableReference ThermalTime: VariableName=[Phenology].ThermalTime
          ArrayFunction LagDurationAgeMultiplier: Values=1 1 1
          ArrayFunction SenescenceDurationAgeMultiplier: Values=1 1 1
          ArrayFunction LeafSizeAgeMultiplier: Values=1 1 1 1 1 1 1 1 1 1 1 1
          Constant RemobilisationCost: FixedValue=0
          Constant CarbonConcentration: FixedValue=0.4
        RUEModel Photosynthesis
          Constant RUE: FixedValue=1.8
          WeightedTemperatureFunction FT: MaximumTemperatureWeighting=0.75
            XYPairs: X=[0, 20, 37, 43]; Y=[0, 1, 1, 0]
          LinearInterpolationFunction FN
            XYPairs: X=[0, 1, 1.5]; Y=[0, 1, 1]
            VariableReference XValue: VariableName=[Leaf].Fn
          LinearInterpolationFunction FW
            XYPairs: X=[0, 0.7, 1]; Y=[0, 1, 1]
            VariableReference XValue: VariableName=[Leaf].Fw
          LinearInterpolationFunction FVPD
            XYPairs: X=[0, 10, 40]; Y=[1, 1, 0]
            VariableReference XValue: VariableName=[Photosynthesis].VPD
          RUECO2Function FCO2: PhotosyntheticPathway=C3
            Memo
              This function can be changed with the responses of Pn from the Face experiment and the work completed by AgMIP rice team. Relative responses can be evlauated in the sensitivity analyses for review.
          VariableReference RadnInt: VariableName=[Leaf].RadiationIntercepted
        Constant FrostFraction: FixedValue=0
        VariableReference ThermalTime: VariableName=[Phenology].ThermalTime
        MinimumFunction FRGRFunction
          VariableReference RUE_FT: VariableName=[Leaf].Photosynthesis.FT
          MinimumFunction Others
            VariableReference RUE_FN: VariableName=[Leaf].Photosynthesis.FN
            VariableReference RUE_FVPD: VariableName=[Leaf].Photosynthesis.FVPD
        BiomassRemoval BiomassRemovalDefaults
          OrganBiomassRemovalType Harvest: FractionLiveToRemove=0; FractionDeadToRemove=0; FractionLiveToResidue=0.3; FractionDeadToResidue=0.3
          OrganBiomassRemovalType Cut: FractionLiveToRemove=0.8; FractionDeadToRemove=0.8; FractionLiveToResidue=0; FractionDeadToResidue=0
          OrganBiomassRemovalType Prune: FractionLiveToRemove=0; FractionDeadToRemove=0; FractionLiveToResidue=0.6; FractionDeadToResidue=0.6
          OrganBiomassRemovalType Graze: FractionLiveToRemove=0.6; FractionDeadToRemove=0.6; FractionLiveToResidue=0.1; FractionDeadToResidue=0.1
          OrganBiomassRemovalType Thin: FractionLiveToRemove=0; FractionDeadToRemove=0; FractionLiveToResidue=0.05; FractionDeadToResidue=0.05
        Constant ExtinctionCoeff: FixedValue=0.7
          Constant ExtinctionCoeff: FixedValue=0.7
        Constant StructuralFraction: FixedValue=0.5
        Constant DMConversionEfficiency: FixedValue=1
        Constant RemobilisationCost: FixedValue=0
        Constant CarbonConcentration: FixedValue=0.4
        Constant StomatalConductanceCO2Modifier: FixedValue=1
        DivideFunction StomatalConductanceCO2Modifier1
          VariableReference FCO2: VariableName=[Leaf].Photosynthesis.FCO2
          ExpressionFunction RelativeCO2Gradient
            Expression=([IWeather].CO2 - [Leaf].CO2internal)/(350 - [Leaf].CO2internal)
        ExpressionFunction CO2internal: Expression=(163 - [IWeather].MeanT)/(5 - 0.1*[IWeather].MeanT)
        Constant WidthFunction: FixedValue=0
        VariableReference DepthFunction: VariableName=[Leaf].Height
        BiomassDemand DMDemandPriorityFactors
          Constant Structural: FixedValue=1
          Constant Metabolic: FixedValue=1
          Constant Storage: FixedValue=1
        BiomassDemand NDemandPriorityFactors
          Constant Structural: FixedValue=1
          Constant Metabolic: FixedValue=1
          Constant Storage: FixedValue=1
      GenericOrgan Spike: IsAboveGround=true
        Constant NReallocationFactor: FixedValue=0
        Constant NRetranslocationFactor: FixedValue=0.3
        Constant MaximumNConc: FixedValue=0.0175
        Constant SenescenceRate: FixedValue=0; Units=/d
        Constant MinimumNConc: FixedValue=0.004
        BiomassRemoval BiomassRemovalDefaults
          OrganBiomassRemovalType Harvest: FractionLiveToRemove=0.5; FractionDeadToRemove=0; FractionLiveToResidue=0.1; FractionDeadToResidue=0
          OrganBiomassRemovalType Cut: FractionLiveToRemove=0.8; FractionDeadToRemove=0; FractionLiveToResidue=0; FractionDeadToResidue=0
          OrganBiomassRemovalType Prune: FractionLiveToRemove=0; FractionDeadToRemove=0; FractionLiveToResidue=0.6; FractionDeadToResidue=0
          OrganBiomassRemovalType Graze: FractionLiveToRemove=0.6; FractionDeadToRemove=0; FractionLiveToResidue=0.2; FractionDeadToResidue=0
          OrganBiomassRemovalType Thin: FractionLiveToRemove=0; FractionDeadToRemove=0; FractionLiveToResidue=0.05; FractionDeadToResidue=0
        PhaseLookupValue NitrogenDemandSwitch: Start=Emergence; End=StartGrainFill
          Constant: FixedValue=1
        PhaseLookup DMRetranslocationFactor
          PhaseLookupValue VegetativeGrowth: Start=Emergence; End=PanicleInitiation
            Constant DMRetranslocationFactor: FixedValue=0.3
          PhaseLookupValue ReproductiveGrowth: Start=PanicleInitiation; End=EndGrainFill
            Constant DMRetranslocationFactor: FixedValue=0
        Constant DetachmentRateFunction: FixedValue=0; Units=/d
        Constant MaintenanceRespirationFunction: FixedValue=0; Units=0-1
        Constant DMConversionEfficiency: FixedValue=1; Units=0-1
          Constant DMConversionEfficiency: FixedValue=1; Units=0-1
        VariableReference HeadNumber: VariableName=[Structure].TotalStemPopn
        Constant DMReallocationFactor: FixedValue=0
        VariableReference CriticalNConc: VariableName=[Spike].MinimumNConc
        Constant RemobilisationCost: FixedValue=0
        Constant CarbonConcentration: FixedValue=0.4
        BiomassDemandAndPriority DMDemands
          MultiplyFunction Structural
            PopulationBasedDemandFunction DMDemandFunction
              VariableReference ThermalTime: VariableName=[Phenology].ThermalTime
              Constant ExpansionStress: FixedValue=1
              VariableReference OrganPopulation: VariableName=[Spike].HeadNumber
              Constant StartStage: FixedValue=4
              Constant MaximumOrganWt: FixedValue=0.6
              AddFunction GrowthDuration
                VariableReference EarlyReproductive: VariableName=[Phenology].EarlyReproductive.Target
                VariableReference GrainDevelopment: VariableName=[Phenology].GrainDevelopment.Target
            Constant StructuralFraction: FixedValue=0.7
          Constant Metabolic: FixedValue=0
          StorageDMDemandFunction Storage
            SubtractFunction StorageFraction
              Constant One: FixedValue=1
              VariableReference StructuralFraction: VariableName=[Spike].DMDemands.Structural.StructuralFraction
          Constant QStructuralPriority: FixedValue=1
          Constant QMetabolicPriority: FixedValue=1
          Constant QStoragePriority: FixedValue=1
        BiomassDemandAndPriority NDemands
          MultiplyFunction Structural
            VariableReference MinNconc: VariableName=[Spike].minimumNconc
            VariableReference PotentialDMAllocation: VariableName=[Spike].potentialDMAllocation.Structural
          MultiplyFunction Metabolic
            SubtractFunction MetabolicNconc
              VariableReference CritNconc: VariableName=[Spike].criticalNConc
              VariableReference MinNconc: VariableName=[Spike].minimumNconc
            VariableReference PotentialDMAllocation: VariableName=[Spike].potentialDMAllocation.Structural
          StorageNDemandFunction Storage
            VariableReference NitrogenDemandSwitch: VariableName=[Spike].nitrogenDemandSwitch
            VariableReference MaxNconc: VariableName=[Spike].maximumNconc
          Constant QStructuralPriority: FixedValue=1
          Constant QMetabolicPriority: FixedValue=1
          Constant QStoragePriority: FixedValue=1
        RetranslocateNonStructural RetranslocateNitrogen
        BiomassDemand InitialWt
          Constant Structural: FixedValue=0; Units=g/m^2
          Constant Metabolic: FixedValue=0
          Constant Storage: FixedValue=0
        Constant Photosynthesis: FixedValue=0
        VariableReference initialNConcFunction: VariableName=[Spike].MinimumNConc
      GenericOrgan Stem: IsAboveGround=true
        Constant SenescenceRate: FixedValue=0; Units=/d
        Constant MinimumNConc: FixedValue=0.01
        Constant MaximumNConc: FixedValue=0.02
        PhaseLookupValue NitrogenDemandSwitch: Start=Emergence; End=StartGrainFill
          Constant: FixedValue=1
        Constant NReallocationFactor: FixedValue=0
        PhaseLookup NRetranslocationFactor
          PhaseLookupValue VegetativeGrowth: Start=Sowing; End=Flowering
            Constant Fraction: FixedValue=0
          PhaseLookupValue ReproductiveGrowth: Start=Flowering; End=HarvestRipe
            Constant Fraction: FixedValue=0.5
        PhaseLookup DMRetranslocationFactor
          PhaseLookupValue VegetativeGrowth: Start=Emergence; End=Flowering
            Constant DMRetranslocationFactor: FixedValue=0
          PhaseLookupValue ReproductiveGrowth: Start=Flowering; End=EndGrainFill
            Constant DMRetranslocationFactor: FixedValue=0.05
        BiomassRemoval BiomassRemovalDefaults: same as Replacements.Rice.Spike.BiomassRemovalDefaults
        DivideFunction PercentWSC
          VariableReference WSC: VariableName=[Stem].Live.StorageWt
          VariableReference StemWt: VariableName=[Stem].Live.Wt
        Constant DetachmentRateFunction: FixedValue=0; Units=/d
        Constant MaintenanceRespirationFunction: FixedValue=0; Units=0-1
        Constant DMConversionEfficiency: FixedValue=1; Units=0-1
        Constant DMReallocationFactor: FixedValue=0
        VariableReference CriticalNConc: VariableName=[Stem].MinimumNConc
        Constant RemobilisationCost: FixedValue=0
        Constant CarbonConcentration: FixedValue=0.4
        BiomassDemandAndPriority DMDemands
          MultiplyFunction Structural
            PartitionFractionDemandFunction DMDemandFunction
              PhaseLookup PartitionFraction
                Memo
                  Biomass partitionning is at 0.5 bewteen leaf and stem then after PI increase to 0.7 during grain developement and elongation stage and to 0.5 during grain filling stage.
                   This should responded to availability of resources.
                PhaseLookupValue PreStemElongation: Start=Emergence; End=TerminalSpikelet
                  Constant StemFraction: FixedValue=0.5
                PhaseLookupValue StemElongation: Start=TerminalSpikelet; End=StartGrainFill
                  Constant StemFraction: FixedValue=0.7
                PhaseLookupValue EarEmergence: Start=StartGrainFill; End=Maturity
                  Constant StemFraction: FixedValue=0.5
            PhaseLookup StructuralFraction
              PhaseLookupValue VegetativeGrowth: Start=Sowing; End=FlagLeaf
                Constant Fraction: FixedValue=0.7
              PhaseLookupValue ReproductiveGrowth: Start=FlagLeaf; End=HarvestRipe
                Constant Fraction: FixedValue=0.05
          Constant Metabolic: FixedValue=0
          StorageDMDemandFunction Storage
            SubtractFunction StorageFraction
              Constant One: FixedValue=1
              VariableReference StructuralFraction: VariableName=[Stem].DMDemands.Structural.StructuralFraction
          Constant QStructuralPriority: FixedValue=1
          Constant QMetabolicPriority: FixedValue=1
            Constant QMetabolicPriority: FixedValue=1
          Constant QStoragePriority: FixedValue=1
        BiomassDemandAndPriority NDemands
          MultiplyFunction Structural
            VariableReference MinNconc: VariableName=[Stem].minimumNconc
            VariableReference PotentialDMAllocation: VariableName=[Stem].potentialDMAllocation.Structural
          MultiplyFunction Metabolic
            SubtractFunction MetabolicNconc
              VariableReference CritNconc: VariableName=[Stem].criticalNConc
              VariableReference MinNconc: VariableName=[Stem].minimumNconc
            VariableReference PotentialDMAllocation: VariableName=[Stem].potentialDMAllocation.Structural
          StorageNDemandFunction Storage
            VariableReference NitrogenDemandSwitch: VariableName=[Stem].nitrogenDemandSwitch
            VariableReference MaxNconc: VariableName=[Stem].maximumNconc
          Constant QStructuralPriority: FixedValue=1
          Constant QMetabolicPriority: FixedValue=1
          Constant QStoragePriority: FixedValue=1
        RetranslocateNonStructural RetranslocateNitrogen
        BiomassDemand InitialWt
          Constant Structural: FixedValue=0.01; Units=g/m^2
          Constant Metabolic: FixedValue=0.01
          Constant Storage: FixedValue=0.01
        Constant Photosynthesis: FixedValue=0.1
          Memo
            This is assuming that stem is contributing to 10% of current Pn of the system but can be more of that. To add reference.
        VariableReference initialNConcFunction: VariableName=[Stem].MinimumNConc
      CompositeBiomass AboveGround: OrganNames=[Leaf, Stem, Spike, Grain]; IncludeLive=true; IncludeDead=true
      CompositeBiomass AboveGroundLive: OrganNames=[Leaf, Stem, Spike, Grain]; IncludeLive=true; IncludeDead=false
      CompositeBiomass AboveGroundDead: OrganNames=[Leaf, Stem, Spike, Grain]; IncludeLive=false; IncludeDead=true
      CompositeBiomass BelowGround: OrganNames=[Root]; IncludeLive=true; IncludeDead=true
      CompositeBiomass Total: OrganNames=[Leaf, Stem, Root, Spike, Grain]; IncludeLive=true; IncludeDead=true
      CompositeBiomass TotalLive: OrganNames=[Leaf, Stem, Root, Spike, Grain]; IncludeLive=true; IncludeDead=false
      CompositeBiomass TotalDead: OrganNames=[Leaf, Stem, Root, Spike, Grain]; IncludeLive=false; IncludeDead=true
      CompositeBiomass Ear: OrganNames=[Spike, Grain]; IncludeLive=true; IncludeDead=true
        Memo
          The Ear composite biomass object includes the Live and dead pools of all organs within the Ear to allow output for total dry matter and Nutrient contents, including total structural, non-structural and metabolic pools.
      CompositeBiomass StemPlusSpike: OrganNames=[Stem, Spike]; IncludeLive=true; IncludeDead=true
      CultivarFolder Cultivars
        CultivarFolder Australia
          Cultivar YRL39
            Command:
              [Phenology].MinimumLeafNumber.FixedValue = 13
              [Phenology].PpSensitivity.FixedValue = 0
              [Phenology].VrnSensitivity.FixedValue = 0
              [Structure].BranchMortality.MortalityPhase.Mortality.MortalityPerDegDay.XYPairs.Y = 0.001,0
              [Phenology].EarlyReproductivePpSensitivity=
          Cultivar Doongarra
            Command:
              [Phenology].MinimumLeafNumber.FixedValue =12
              [Phenology].PpSensitivity.FixedValue = 0
          Cultivar Urambie
            Command:
              [Phenology].MinimumLeafNumber.FixedValue = 9.66
              [Phenology].PpSensitivity.FixedValue = 0.33
              [Phenology].VrnSensitivity.FixedValue = 0.33
              [Phenology].EarlyReproductivePpSensitivity.FixedValue = 2
              [Structure].BranchMortality.MortalityPhase.Mortality.MortalityPerDegDay.XYPairs.Y = 0.001,0
          Cultivar Westminster
            Command:
              [Phenology].MinimumLeafNumber.FixedValue = 9
              [Phenology].PpSensitivity.FixedValue = 0.5
              [Phenology].VrnSensitivity.FixedValue = 0.33
              [Phenology].EarlyReproductivePpSensitivity.FixedValue = 2
              [Structure].BranchMortality.MortalityPhase.Mortality.MortalityPerDegDay.XYPairs.Y = 0.001,0
          Cultivar Yagan
            Command:
              [Phenology].MinimumLeafNumber.FixedValue = 7
              [Phenology].PpSensitivity.FixedValue = 2
              [Phenology].VrnSensitivity.FixedValue = 1.33
              [Phenology].EarlyReproductivePpSensitivity.FixedValue = 2
              [Structure].BranchMortality.MortalityPhase.Mortality.MortalityPerDegDay.XYPairs.Y = 0.001,0
      Constant MortalityRate: FixedValue=0
  DataStore
  Simulation Brandon_DS_2018_P200_F200_Doongarra
    Clock: Start=2018-01-01; End=2018-12-31
    Summary SummaryFile
    Weather: FileName=C:\2020_Try_model\weather\Brandon.met
    SoilArbitrator
    Zone Field: Area=1; Slope=0; AspectAngle=0; Altitude=50
      Fertiliser
      Irrigation
      Soil: ASCOrder=Ferrasol; ASCSubOrder=Gray; SoilType=Clay; Site=Brandon; NearestTown=Brandon; Region=Burdekin; State=Queensland; Country=Australia; ApsoilNumber=497 Generic; Latitude=-19.55; Longitude=147.35; LocationAccuracy=+/- 20m; YearOfSampling=2018; DataSource=Agrifutures Rice project; Comments=2018-2020 Rice in the Northern Queensland project
        Physical
          Thickness  BD    AirDry  LL15   DUL    SAT    KS
          100        1.1   0.127   0.29   0.528  0.554  30
          100        0.96  0.127   0.3    0.528  0.554  30
          100        0.87  0.13    0.315  0.561  0.589  30
          100        0.74  0.141   0.325  0.59   0.619  30
          100        0.63  0.153   0.325  0.637  0.668  8
          100        1.16  0.09    0.325  0.403  0.423  30
          100        1.03  0.102   0.325  0.425  0.446  30
          SoilCrop RiceSoil: LL=[0.29, 0.3, 0.315, 0.325, 0.325, 0.325, 0.325]; KL=[0.08, 0.08, 0.08, 0.08, 0.08, 0.08, 0.08]; XF=[1, 1, 1, 1, 0.8, 0.8, 0.8]
        WaterBalance SoilWater: SummerDate=1-Nov; SummerU=5; SummerCona=5; WinterDate=1-Apr; WinterU=5; WinterCona=5; DiffusConst=40; DiffusSlope=16; Salb=0.12; CN2Bare=73; CNRed=20; CNCov=0.8; Thickness=[100, 100, 100, 100, 100, 100, 100]; SWCON=[0.7, 0.7, 0.7, 0.7, 0.1, 0.1, 0.5]
        Organic: FOMCNRatio=40
          Thickness  Carbon  SoilCNRatio  FBiom  FInert  FOM
          100        0.73    12           0.025  0.4     347.129
          100        0.5     12           0.012  0.5     270.344
          100        0.4     12           0.005  0.6     163.972
          100        0.3     12           0.005  0.8     99.4541
          100        0.3     12           0.005  0.8     60.322
          100        0.3     12           0.005  0.8     36.5871
          100        0.3     12           0.005  0.8     22.1912
        Chemical
          Thickness  NO3N   NH4N  PH
          100        2.5    2     5.9
          100        1.25   1     5.9
          100        1      1     5.9
          100        0.08   0.08  4.5
          100        0.008  0.08  4.5
          100        0.008  0.08  4.5
          100        0.008  0.08  4.5
        InitialWater: PercentMethod=1; FractionFull=1
        Sample InitialN: SWUnits=Volumetric; OCUnits=Total; PHUnits=Water
          Thickness  NO3    NH4
          100        2.5    2
          100        1.25   1
          100        1      1
          100        0.08   0.08
          100        0.008  0.08
          100        0.008  0.08
          100        0.008  0.08
        CERESSoilTemperature Temperature
        Nutrient
      SurfaceOrganicMatter: InitialResidueName=wheat_stubble; InitialResidueType=wheat; InitialResidueMass=0; InitialStandingFraction=0; InitialCPR=0; InitialCNR=100
      MicroClimate: a_interception=0; b_interception=1; c_interception=0; d_interception=0; SoilHeatFluxFraction=0.4; MinimumHeightDiffForNewLayer=0; NightInterceptionFraction=0.5; ReferenceHeight=2
      Manager SowingFertiliser
        Amount = 100
        CropName = Rice
```csharp
using Models.PMF;
using Models.Core;
using System;
namespace Models
{
    [Serializable]
    public class Script : Model
    {
        [Link] Clock Clock;
        [Link] Fertiliser Fertiliser;
        [Link] Summary Summary;
        
        
        [Description("Amount of fertiliser to be applied (kg/ha)")]
        public double Amount { get; set;}
        
        [Description("Crop to be fertilised")]
        public string CropName { get; set;}
        
        
        

        [EventSubscribe("Sowing")]
        private void OnSowing(object sender, EventArgs e)
        {
            Model crop = sender as Model;
            if (crop.Name.ToLower()==CropName.ToLower())
                Fertiliser.Apply(Amount: Amount, Type: Fertiliser.Types.NO3N);
        }
        
    }
}
```
      Manager Harvest
```csharp
using Models.Soils.Nutrients;
using System;
using Models.Core;
using Models.PMF;
using Models.Soils;
using Models.Soils.Nutrients;
using Models.Utilities;
using APSIM.Shared.Utilities;

namespace Models
{
    [Serializable]
    public class Script : Model
    {
        [Link] Plant Wheat;

        [EventSubscribe("DoManagement")]
        private void OnDoManagement(object sender, EventArgs e)
        {
            if (Wheat.IsReadyForHarvesting)
            {
               Wheat.Harvest();
               Wheat.EndCrop();    
            }
        
        }
        
    }
}
```
      Manager Sow on a fixed date
        Crop = [Rice]
        SowDate = 24-Jul
        CultivarName = Doongarra
        SowingDepth = 2.5
        RowSpacing = 200
        Population = 200
```csharp
using Models.Soils.Nutrients;
using System;
using Models.Core;
using Models.PMF;
using Models.Soils;
using Models.Soils.Nutrients;
using Models.Utilities;
using APSIM.Shared.Utilities;

namespace Models
{
    [Serializable]
    public class Script : Model
    {
        [Link] Clock Clock;
        [Link] Fertiliser Fertiliser;
        [Link] Summary Summary;
        [Link] Soil Soil;
        Accumulator accumulatedRain;
        
        [Description("Crop")]
        public IPlant Crop { get; set; }
        [Description("Sowing date (d-mmm)")]
        public string SowDate { get; set; }
    [Display(Type = DisplayType.CultivarName)]
        [Description("Cultivar to be sown")]
        public string CultivarName { get; set; }
        [Description("Sowing depth (mm)")]
        public double SowingDepth { get; set; }
        [Description("Row spacing (mm)")]
        public double RowSpacing { get; set; }
        [Description("Plant population (/m2)")]
        public double Population { get; set; }
        


        [EventSubscribe("DoManagement")]
        private void OnDoManagement(object sender, EventArgs e)
        {
            if (DateUtilities.WithinDates(SowDate, Clock.Today, SowDate))
            {
                Crop.Sow(population: Population, cultivar: CultivarName, depth: SowingDepth, rowSpacing: RowSpacing);    
            }
        
        }
        
    }
}
```
      Operations
        2018-09-21  [Fertiliser].Apply(100, Fertiliser.Types.NO3N, 25);
        2018-12-23  [Fertiliser].Apply(0, Fertiliser.Types.NO3N, 50);
        2018-12-23  [Fertiliser].Apply(0, Fertiliser.Types.NO3N, 50);
        2018-10-11  [Fertiliser].Apply(0, Fertiliser.Types.NO3N, 25);
        2018-08-01  [Fertiliser].Apply(0, Fertiliser.Types.NO3N, 25);
        2018-07-21  [Fertiliser].Apply(0, Fertiliser.Types.NO3N, 25);
      Manager AutoIrrigation
        AutoIrrigationOn = True
        FASWThreshold = 1
        FASWDepth = 200
```csharp
using Models.Interfaces;
using System;
using Models.Core;
using System.Collections.Generic;
using System.Text;
using Models.Soils;
using Models.PMF;
using Models;
using System.Xml.Serialization;
using APSIM.Shared.Utilities;

namespace Models
{
    [Serializable] 
    public class Script : Model
    {
        [Link] private Zone zone;
        [Link] private Irrigation irrigation;
        [Link] private Soil soil;
        [Link]
        private IPhysical soilPhysical;
        [Link]
        private ISoilWater waterBalance;
        public double FASW { get; set; }
        public double WaterDeficit  { get; set; }
    
        
        [Description("Auto irrigation on?")]
        public bool AutoIrrigationOn { get; set; }

        [Description("Threshold fraction available water (0-1)")]
        public double FASWThreshold { get; set; }

        [Description("Soil depth (mm) to which fraction available water is calculated")]
        public double FASWDepth { get; set; }

        [EventSubscribe("DoManagement")]
        private void OnDoManagement(object sender, EventArgs e)
        {
            CalculateFASW();
            if (AutoIrrigationOn)
            {
                if (FASW < FASWThreshold)
                {
                    double amount = 10;
                    irrigation.Apply(WaterDeficit, depth: 0);
                }
            }
        }
        
        private void CalculateFASW()
        {
            double[] LL15 = MathUtilities.Multiply(soilPhysical.LL15, soilPhysical.Thickness);
            double[] DUL = MathUtilities.Multiply(soilPhysical.DUL, soilPhysical.Thickness);
        
            int nlayr = GetLayerIndex();
            double cumdep = MathUtilities.Sum(soilPhysical.Thickness, 0, nlayr, 0.0);

            double excess_fr = MathUtilities.Divide((cumdep - FASWDepth), soilPhysical.Thickness[nlayr], 0.0);

            // note that results may be strange if swdep < ll15
            double avail_sw = (MathUtilities.Sum(waterBalance.SWmm, 0, nlayr, 0.0)
                              - excess_fr * waterBalance.SWmm[nlayr])
                              - (MathUtilities.Sum(LL15, 0, nlayr, 0.0)
                              - excess_fr * LL15[nlayr]);


            double pot_avail_sw = (MathUtilities.Sum(DUL, 0, nlayr, 0.0)
                                  - excess_fr * DUL[nlayr])
                                  - (MathUtilities.Sum(LL15, 0, nlayr, 0.0)
                                  - excess_fr * LL15[nlayr]);

            FASW = MathUtilities.Divide(avail_sw, pot_avail_sw, 0.0);
            WaterDeficit = MathUtilities.Constrain(pot_avail_sw - avail_sw, 0.0, 100000);
        }

        private int GetLayerIndex()
        {
            double[] cumThickness = soilPhysical.ThicknessCumulative;
            for (int i = 1; i < cumThickness.Length; i++)
            {
                if (FASWDepth < cumThickness[i])
                    return i - 1;
            }
            
            return cumThickness.Length - 1;
        }

    }
}
```
      Plant Rice: ResourceName=Barley
      Report: EventNames=[Clock].EndOfDay
        VariableNames:
          [Clock].Today
          [Rice].Ear.Wt
          [Rice].AboveGround.Wt*10 as WAGT
          [Rice].Grain.Wt
          [Rice].Leaf.LAI
          [Rice].Leaf.Wt*10 as WLV
          [Rice].Leaf.SpecificArea
          [Rice].Spike.Wt*10 as WSO
          [Rice].Grain.Total.Wt*10 as Yield
          [Rice].Stem.Wt*10 as WST
          [Rice].Phenology.CurrentStageName
          [Rice].Leaf.PlantAppearedLeafNo
  Simulation Brandon_DS_2018_P150_F200_100_Doongarra
    Clock: Start=2018-01-01; End=2018-12-31
    Summary SummaryFile
    Weather: FileName=C:\2020_Try_model\weather\Brandon.met
    SoilArbitrator
    Zone Field: Area=1; Slope=0; AspectAngle=0; Altitude=50
      Fertiliser
      Irrigation
      Soil: same as Brandon_DS_2018_P200_F200_Doongarra.Field.Soil
      SurfaceOrganicMatter: InitialResidueName=wheat_stubble; InitialResidueType=wheat; InitialResidueMass=0; InitialStandingFraction=0; InitialCPR=0; InitialCNR=100
      MicroClimate: a_interception=0; b_interception=1; c_interception=0; d_interception=0; SoilHeatFluxFraction=0.4; MinimumHeightDiffForNewLayer=0; NightInterceptionFraction=0.5; ReferenceHeight=2
      Manager SowingFertiliser
        Amount = 200
        CropName = Rice
        script: same as in Brandon_DS_2018_P200_F200_Doongarra.Field.SowingFertiliser
      Manager Harvest: same as Brandon_DS_2018_P200_F200_Doongarra.Field.Harvest
      Manager Sow on a fixed date: same as Brandon_DS_2018_P200_F200_Doongarra.Field.Sow on a fixed date
      Operations
        2018-09-21  [Fertiliser].Apply(0, Fertiliser.Types.NO3N, 25);
        2018-07-23  [Irrigation].Apply(25);
        2018-07-30  [Irrigation].Apply(25);
        2018-09-05  [Irrigation].Apply(25);
        2018-08-22  [Irrigation].Apply(25);
        2018-09-15  [Irrigation].Apply(25);
        2018-09-22  [Irrigation].Apply(25);
        2018-09-30  [Irrigation].Apply(25);
        2018-10-15  [Irrigation].Apply(25);
        2018-10-22  [Irrigation].Apply(25);
        2018-10-30  [Irrigation].Apply(25);
        2018-11-06  [Irrigation].Apply(25);
        2018-11-15  [Irrigation].Apply(25);
      Manager AutoIrrigation
        AutoIrrigationOn = False
        FASWThreshold = 1
        FASWDepth = 200
        script: same as in Brandon_DS_2018_P200_F200_Doongarra.Field.AutoIrrigation
      Plant Rice: ResourceName=Barley
      Report: same as Brandon_DS_2018_P200_F200_Doongarra.Field.Report
  Simulation Brandon_DS_2018_P150_F200_80_Doongarra
    Clock: Start=2018-01-01; End=2018-12-31
    Summary SummaryFile
    Weather: FileName=C:\2020_Try_model\weather\Brandon.met
    SoilArbitrator
    Zone Field: Area=1; Slope=0; AspectAngle=0; Altitude=50
      Fertiliser
      Irrigation
      Soil: same as Brandon_DS_2018_P200_F200_Doongarra.Field.Soil
      SurfaceOrganicMatter: InitialResidueName=wheat_stubble; InitialResidueType=wheat; InitialResidueMass=0; InitialStandingFraction=0; InitialCPR=0; InitialCNR=100
      MicroClimate: a_interception=0; b_interception=1; c_interception=0; d_interception=0; SoilHeatFluxFraction=0.4; MinimumHeightDiffForNewLayer=0; NightInterceptionFraction=0.5; ReferenceHeight=2
      Manager SowingFertiliser
        Amount = 160
        CropName = Rice
        script: same as in Brandon_DS_2018_P200_F200_Doongarra.Field.SowingFertiliser
      Manager Harvest: same as Brandon_DS_2018_P200_F200_Doongarra.Field.Harvest
      Manager Sow on a fixed date: same as Brandon_DS_2018_P200_F200_Doongarra.Field.Sow on a fixed date
      Operations
        2018-09-21  [Fertiliser].Apply(40, Fertiliser.Types.NO3N, 25);
        2018-07-23  [Irrigation].Apply(25);
        2018-07-30  [Irrigation].Apply(25);
        2018-09-05  [Irrigation].Apply(25);
        2018-08-22  [Irrigation].Apply(25);
        2018-09-15  [Irrigation].Apply(25);
        2018-09-22  [Irrigation].Apply(25);
        2018-09-30  [Irrigation].Apply(25);
        2018-10-15  [Irrigation].Apply(25);
        2018-10-22  [Irrigation].Apply(25);
        2018-10-30  [Irrigation].Apply(25);
        2018-11-06  [Irrigation].Apply(25);
        2018-11-15  [Irrigation].Apply(25);
      Manager AutoIrrigation: same as Brandon_DS_2018_P150_F200_100_Doongarra.Field.AutoIrrigation
      Plant Rice: ResourceName=Barley
      Report: same as Brandon_DS_2018_P200_F200_Doongarra.Field.Report
  Simulation Brandon_DS_2018_P150_F200_50_Doongarra
    Clock: Start=2018-01-01; End=2018-12-31
    Summary SummaryFile
    Weather: FileName=C:\2020_Try_model\weather\Brandon.met
    SoilArbitrator
    Zone Field: Area=1; Slope=0; AspectAngle=0; Altitude=50
      Fertiliser
      Irrigation
      Soil: same as Brandon_DS_2018_P200_F200_Doongarra.Field.Soil
      SurfaceOrganicMatter: InitialResidueName=wheat_stubble; InitialResidueType=wheat; InitialResidueMass=0; InitialStandingFraction=0; InitialCPR=0; InitialCNR=100
      MicroClimate: a_interception=0; b_interception=1; c_interception=0; d_interception=0; SoilHeatFluxFraction=0.4; MinimumHeightDiffForNewLayer=0; NightInterceptionFraction=0.5; ReferenceHeight=2
      Manager SowingFertiliser: same as Brandon_DS_2018_P200_F200_Doongarra.Field.SowingFertiliser
      Manager Harvest: same as Brandon_DS_2018_P200_F200_Doongarra.Field.Harvest
      Manager Sow on a fixed date: same as Brandon_DS_2018_P200_F200_Doongarra.Field.Sow on a fixed date
      Operations
        2018-09-21  [Fertiliser].Apply(100, Fertiliser.Types.NO3N, 25);
        2018-07-23  [Irrigation].Apply(25);
        2018-07-30  [Irrigation].Apply(25);
        2018-09-05  [Irrigation].Apply(25);
        2018-08-22  [Irrigation].Apply(25);
        2018-09-15  [Irrigation].Apply(25);
        2018-09-22  [Irrigation].Apply(25);
        2018-09-30  [Irrigation].Apply(25);
        2018-10-15  [Irrigation].Apply(25);
        2018-10-22  [Irrigation].Apply(25);
        2018-10-30  [Irrigation].Apply(25);
        2018-11-06  [Irrigation].Apply(25);
        2018-11-15  [Irrigation].Apply(25);
      Manager AutoIrrigation: same as Brandon_DS_2018_P150_F200_100_Doongarra.Field.AutoIrrigation
      Plant Rice: ResourceName=Barley
      Report: same as Brandon_DS_2018_P200_F200_Doongarra.Field.Report
  Simulation Brandon_DS_2018_P150_F200_20_Doongarra
    Clock: Start=2018-01-01; End=2018-12-31
    Summary SummaryFile
    Weather: FileName=C:\2020_Try_model\weather\Brandon.met
    SoilArbitrator
    Zone Field: Area=1; Slope=0; AspectAngle=0; Altitude=50
      Fertiliser
      Irrigation
      Soil: same as Brandon_DS_2018_P200_F200_Doongarra.Field.Soil
      SurfaceOrganicMatter: InitialResidueName=wheat_stubble; InitialResidueType=wheat; InitialResidueMass=0; InitialStandingFraction=0; InitialCPR=0; InitialCNR=100
      MicroClimate: a_interception=0; b_interception=1; c_interception=0; d_interception=0; SoilHeatFluxFraction=0.4; MinimumHeightDiffForNewLayer=0; NightInterceptionFraction=0.5; ReferenceHeight=2
      Manager SowingFertiliser
        Amount = 40
        CropName = Rice
        script: same as in Brandon_DS_2018_P200_F200_Doongarra.Field.SowingFertiliser
      Manager Harvest: same as Brandon_DS_2018_P200_F200_Doongarra.Field.Harvest
      Manager Sow on a fixed date: same as Brandon_DS_2018_P200_F200_Doongarra.Field.Sow on a fixed date
      Operations
        2018-09-21  [Fertiliser].Apply(160, Fertiliser.Types.NO3N, 25);
        2018-07-23  [Irrigation].Apply(25);
        2018-07-30  [Irrigation].Apply(25);
        2018-09-05  [Irrigation].Apply(25);
        2018-08-22  [Irrigation].Apply(25);
        2018-09-15  [Irrigation].Apply(25);
        2018-09-22  [Irrigation].Apply(25);
        2018-09-30  [Irrigation].Apply(25);
        2018-10-15  [Irrigation].Apply(25);
        2018-10-22  [Irrigation].Apply(25);
        2018-10-30  [Irrigation].Apply(25);
        2018-11-06  [Irrigation].Apply(25);
        2018-11-15  [Irrigation].Apply(25);
      Manager AutoIrrigation: same as Brandon_DS_2018_P150_F200_100_Doongarra.Field.AutoIrrigation
      Plant Rice: ResourceName=Barley
      Report: same as Brandon_DS_2018_P200_F200_Doongarra.Field.Report
  Simulation Brandon_DS_2018_P150_F200__0_Doongarra
    Clock: Start=2018-01-01; End=2018-12-31
    Summary SummaryFile
    Weather: FileName=C:\2020_Try_model\weather\Brandon.met
    SoilArbitrator
    Zone Field: Area=1; Slope=0; AspectAngle=0; Altitude=50
      Fertiliser
      Irrigation
      Soil: same as Brandon_DS_2018_P200_F200_Doongarra.Field.Soil
      SurfaceOrganicMatter: InitialResidueName=wheat_stubble; InitialResidueType=wheat; InitialResidueMass=0; InitialStandingFraction=0; InitialCPR=0; InitialCNR=100
      MicroClimate: a_interception=0; b_interception=1; c_interception=0; d_interception=0; SoilHeatFluxFraction=0.4; MinimumHeightDiffForNewLayer=0; NightInterceptionFraction=0.5; ReferenceHeight=2
      Manager SowingFertiliser
        Amount = 0
        CropName = Rice
        script: same as in Brandon_DS_2018_P200_F200_Doongarra.Field.SowingFertiliser
      Manager Harvest: same as Brandon_DS_2018_P200_F200_Doongarra.Field.Harvest
      Manager Sow on a fixed date: same as Brandon_DS_2018_P200_F200_Doongarra.Field.Sow on a fixed date
      Operations: same as Brandon_DS_2018_P150_F200_100_Doongarra.Field.Operations
      Manager AutoIrrigation: same as Brandon_DS_2018_P150_F200_100_Doongarra.Field.AutoIrrigation
      Plant Rice: ResourceName=Barley
      Report: same as Brandon_DS_2018_P200_F200_Doongarra.Field.Report
  Simulation Brandon_WS_2018_P200_F200_Doongarra
    Clock: Start=2018-01-01; End=2018-12-31
    Summary SummaryFile
    Weather: FileName=C:\2020_Try_model\weather\Brandon.met
    SoilArbitrator
    Zone Field: Area=1; Slope=0; AspectAngle=0; Altitude=50
      Fertiliser
      Irrigation
      Soil: ASCOrder=Ferrasol; ASCSubOrder=Gray; SoilType=Clay; Site=Brandon; NearestTown=Brandon; Region=Burdekin; State=Queensland; Country=Australia; ApsoilNumber=497 Generic; Latitude=-19.55; Longitude=147.35; LocationAccuracy=+/- 20m; YearOfSampling=2018; DataSource=Agrigutures Rice project; Comments=2018-2020 Rice in the Northern Queensland project
        Physical: same as Brandon_DS_2018_P200_F200_Doongarra.Field.Soil.Physical
        WaterBalance SoilWater: same as Brandon_DS_2018_P200_F200_Doongarra.Field.Soil.SoilWater
        Organic: same as Brandon_DS_2018_P200_F200_Doongarra.Field.Soil.Organic
        Chemical: same as Brandon_DS_2018_P200_F200_Doongarra.Field.Soil.Chemical
        InitialWater: PercentMethod=1; FractionFull=1
        Sample InitialN: same as Brandon_DS_2018_P200_F200_Doongarra.Field.Soil.InitialN
        CERESSoilTemperature Temperature
        Nutrient
      SurfaceOrganicMatter: InitialResidueName=wheat_stubble; InitialResidueType=wheat; InitialResidueMass=0; InitialStandingFraction=0; InitialCPR=0; InitialCNR=100
      MicroClimate: a_interception=0; b_interception=1; c_interception=0; d_interception=0; SoilHeatFluxFraction=0.4; MinimumHeightDiffForNewLayer=0; NightInterceptionFraction=0.5; ReferenceHeight=2
      Manager SowingFertiliser: same as Brandon_DS_2018_P150_F200__0_Doongarra.Field.SowingFertiliser
      Manager Harvest: same as Brandon_DS_2018_P200_F200_Doongarra.Field.Harvest
      Manager Sow on a fixed date
        Crop = [Rice]
        SowDate = 22-Jan
        CultivarName = Doongarra
        SowingDepth = 2.5
        RowSpacing = 200
        Population = 200
        script: same as in Brandon_DS_2018_P200_F200_Doongarra.Field.Sow on a fixed date
      Operations
        2018-01-23  [Irrigation].Apply(0);
        2018-01-30  [Irrigation].Apply(0);
        2018-02-22  [Irrigation].Apply(0);
        2018-02-15  [Irrigation].Apply(0);
        2018-03-15  [Irrigation].Apply(0);
        2018-03-30  [Irrigation].Apply(0);
        2018-04-30  [Irrigation].Apply(0);
        2018-04-15  [Irrigation].Apply(0);
        2018-01-15  [Fertiliser].Apply(0, Fertiliser.Types.NO3N, 25);
        2018-01-15  [Fertiliser].Apply(200, Fertiliser.Types.NO3N, 25);
      Manager AutoIrrigation
        AutoIrrigationOn = False
        FASWThreshold = 0.8
        FASWDepth = 500
        script: same as in Brandon_DS_2018_P200_F200_Doongarra.Field.AutoIrrigation
      Plant Rice: ResourceName=Barley
      Report: same as Brandon_DS_2018_P200_F200_Doongarra.Field.Report
  Simulation Brandon_WS_2018_P150_F200_100_Doongarra
    Clock: Start=2018-01-01; End=2018-12-31
    Summary SummaryFile
    Weather: FileName=C:\2020_Try_model\weather\Brandon.met
    SoilArbitrator
    Zone Field: Area=1; Slope=0; AspectAngle=0; Altitude=50
      Fertiliser
      Irrigation
      Soil: same as Brandon_WS_2018_P200_F200_Doongarra.Field.Soil
      SurfaceOrganicMatter: InitialResidueName=wheat_stubble; InitialResidueType=wheat; InitialResidueMass=0; InitialStandingFraction=0; InitialCPR=0; InitialCNR=100
      MicroClimate: a_interception=0; b_interception=1; c_interception=0; d_interception=0; SoilHeatFluxFraction=0.4; MinimumHeightDiffForNewLayer=0; NightInterceptionFraction=0.5; ReferenceHeight=2
      Manager SowingFertiliser: same as Brandon_DS_2018_P150_F200__0_Doongarra.Field.SowingFertiliser
      Manager Harvest: same as Brandon_DS_2018_P200_F200_Doongarra.Field.Harvest
      Manager Sow on a fixed date
        Crop = [Rice]
        SowDate = 22-Jan
        CultivarName = Doongarra
        SowingDepth = 2.5
        RowSpacing = 200
        Population = 150
        script: same as in Brandon_DS_2018_P200_F200_Doongarra.Field.Sow on a fixed date
      Operations
        2018-01-23  [Irrigation].Apply(0);
        2018-01-30  [Irrigation].Apply(0);
        2018-02-22  [Irrigation].Apply(0);
        2018-02-15  [Irrigation].Apply(0);
        2018-03-15  [Irrigation].Apply(0);
        2018-03-30  [Irrigation].Apply(0);
        2018-04-30  [Irrigation].Apply(0);
        2018-04-15  [Irrigation].Apply(0);
        2018-01-15  [Fertiliser].Apply(100, Fertiliser.Types.NO3N, 25);
        2018-03-15  [Fertiliser].Apply(100, Fertiliser.Types.NO3N, 25);
      Manager AutoIrrigation: same as Brandon_WS_2018_P200_F200_Doongarra.Field.AutoIrrigation
      Plant Rice: ResourceName=Barley
      Report: same as Brandon_DS_2018_P200_F200_Doongarra.Field.Report
  Simulation Brandon_WS_2018_P150_F200_80_Doongarra
    Clock: Start=2018-01-01; End=2018-12-31
    Summary SummaryFile
    Weather: FileName=C:\2020_Try_model\weather\Brandon.met
    SoilArbitrator
    Zone Field: Area=1; Slope=0; AspectAngle=0; Altitude=50
      Fertiliser
      Irrigation
      Soil: same as Brandon_WS_2018_P200_F200_Doongarra.Field.Soil
      SurfaceOrganicMatter: InitialResidueName=wheat_stubble; InitialResidueType=wheat; InitialResidueMass=0; InitialStandingFraction=0; InitialCPR=0; InitialCNR=100
      MicroClimate: a_interception=0; b_interception=1; c_interception=0; d_interception=0; SoilHeatFluxFraction=0.4; MinimumHeightDiffForNewLayer=0; NightInterceptionFraction=0.5; ReferenceHeight=2
      Manager SowingFertiliser: same as Brandon_DS_2018_P150_F200__0_Doongarra.Field.SowingFertiliser
      Manager Harvest: same as Brandon_DS_2018_P200_F200_Doongarra.Field.Harvest
      Manager Sow on a fixed date: same as Brandon_WS_2018_P150_F200_100_Doongarra.Field.Sow on a fixed date
      Operations
        2018-01-23  [Irrigation].Apply(0);
        2018-01-30  [Irrigation].Apply(0);
        2018-02-22  [Irrigation].Apply(0);
        2018-02-15  [Irrigation].Apply(0);
        2018-03-15  [Irrigation].Apply(0);
        2018-03-30  [Irrigation].Apply(0);
        2018-04-30  [Irrigation].Apply(0);
        2018-04-15  [Irrigation].Apply(0);
        2018-01-15  [Fertiliser].Apply(160, Fertiliser.Types.NO3N, 25);
        2018-03-15  [Fertiliser].Apply(40, Fertiliser.Types.NO3N, 25);
      Manager AutoIrrigation: same as Brandon_WS_2018_P200_F200_Doongarra.Field.AutoIrrigation
      Plant Rice: ResourceName=Barley
      Report: same as Brandon_DS_2018_P200_F200_Doongarra.Field.Report
  Simulation Brandon_WS_2018_P150_F200_50_Doongarra
    Clock: Start=2018-01-01; End=2018-12-31
    Summary SummaryFile
    Weather: FileName=C:\2020_Try_model\weather\Brandon.met
    SoilArbitrator
    Zone Field: Area=1; Slope=0; AspectAngle=0; Altitude=50
      Fertiliser
      Irrigation
      Soil: same as Brandon_WS_2018_P200_F200_Doongarra.Field.Soil
      SurfaceOrganicMatter: InitialResidueName=wheat_stubble; InitialResidueType=wheat; InitialResidueMass=0; InitialStandingFraction=0; InitialCPR=0; InitialCNR=100
      MicroClimate: a_interception=0; b_interception=1; c_interception=0; d_interception=0; SoilHeatFluxFraction=0.4; MinimumHeightDiffForNewLayer=0; NightInterceptionFraction=0.5; ReferenceHeight=2
      Manager SowingFertiliser: same as Brandon_DS_2018_P150_F200__0_Doongarra.Field.SowingFertiliser
      Manager Harvest: same as Brandon_DS_2018_P200_F200_Doongarra.Field.Harvest
      Manager Sow on a fixed date: same as Brandon_WS_2018_P150_F200_100_Doongarra.Field.Sow on a fixed date
      Operations: same as Brandon_WS_2018_P150_F200_100_Doongarra.Field.Operations
      Manager AutoIrrigation: same as Brandon_WS_2018_P200_F200_Doongarra.Field.AutoIrrigation
      Report: same as Brandon_DS_2018_P200_F200_Doongarra.Field.Report
      Plant Rice: ResourceName=Barley
  Simulation Brandon_WS_2018_P150_F200_20_Doongarra
    Clock: Start=2018-01-01; End=2018-12-31
    Summary SummaryFile
    Weather: FileName=C:\2020_Try_model\weather\Brandon.met
    SoilArbitrator
    Zone Field: Area=1; Slope=0; AspectAngle=0; Altitude=50
      Fertiliser
      Irrigation
      Soil: same as Brandon_WS_2018_P200_F200_Doongarra.Field.Soil
      SurfaceOrganicMatter: InitialResidueName=wheat_stubble; InitialResidueType=wheat; InitialResidueMass=0; InitialStandingFraction=0; InitialCPR=0; InitialCNR=100
      MicroClimate: a_interception=0; b_interception=1; c_interception=0; d_interception=0; SoilHeatFluxFraction=0.4; MinimumHeightDiffForNewLayer=0; NightInterceptionFraction=0.5; ReferenceHeight=2
      Manager SowingFertiliser: same as Brandon_DS_2018_P150_F200__0_Doongarra.Field.SowingFertiliser
      Manager Harvest: same as Brandon_DS_2018_P200_F200_Doongarra.Field.Harvest
      Manager Sow on a fixed date: same as Brandon_WS_2018_P150_F200_100_Doongarra.Field.Sow on a fixed date
      Operations
        2018-01-23  [Irrigation].Apply(0);
        2018-01-30  [Irrigation].Apply(0);
        2018-02-22  [Irrigation].Apply(0);
        2018-02-15  [Irrigation].Apply(0);
        2018-03-15  [Irrigation].Apply(0);
        2018-03-30  [Irrigation].Apply(0);
        2018-04-30  [Irrigation].Apply(0);
        2018-04-15  [Irrigation].Apply(0);
        2018-01-15  [Fertiliser].Apply(40, Fertiliser.Types.NO3N, 25);
        2018-03-15  [Fertiliser].Apply(160, Fertiliser.Types.NO3N, 25);
      Manager AutoIrrigation: same as Brandon_WS_2018_P200_F200_Doongarra.Field.AutoIrrigation
      Plant Rice: ResourceName=Barley
      Report: same as Brandon_DS_2018_P200_F200_Doongarra.Field.Report
  Simulation Brandon_WS_2018_P150_F200_0_Doongarra
    Clock: Start=2018-01-01; End=2018-12-31
    Summary SummaryFile
    Weather: FileName=C:\2020_Try_model\weather\Brandon.met
    SoilArbitrator
    Zone Field: Area=1; Slope=0; AspectAngle=0; Altitude=50
      Fertiliser
      Irrigation
      Soil: same as Brandon_WS_2018_P200_F200_Doongarra.Field.Soil
      SurfaceOrganicMatter: InitialResidueName=wheat_stubble; InitialResidueType=wheat; InitialResidueMass=0; InitialStandingFraction=0; InitialCPR=0; InitialCNR=100
      MicroClimate: a_interception=0; b_interception=1; c_interception=0; d_interception=0; SoilHeatFluxFraction=0.4; MinimumHeightDiffForNewLayer=0; NightInterceptionFraction=0.5; ReferenceHeight=2
      Manager SowingFertiliser: same as Brandon_DS_2018_P150_F200__0_Doongarra.Field.SowingFertiliser
      Manager Harvest: same as Brandon_DS_2018_P200_F200_Doongarra.Field.Harvest
      Manager Sow on a fixed date: same as Brandon_WS_2018_P150_F200_100_Doongarra.Field.Sow on a fixed date
      Operations
        2018-01-23  [Irrigation].Apply(0);
        2018-01-30  [Irrigation].Apply(0);
        2018-02-22  [Irrigation].Apply(0);
        2018-02-15  [Irrigation].Apply(0);
        2018-03-15  [Irrigation].Apply(0);
        2018-03-30  [Irrigation].Apply(0);
        2018-04-30  [Irrigation].Apply(0);
        2018-04-15  [Irrigation].Apply(0);
        2018-01-15  [Fertiliser].Apply(0, Fertiliser.Types.NO3N, 25);
        2018-03-15  [Fertiliser].Apply(200, Fertiliser.Types.NO3N, 25);
      Manager AutoIrrigation: same as Brandon_WS_2018_P200_F200_Doongarra.Field.AutoIrrigation
      Plant Rice: ResourceName=Barley
      Report: same as Brandon_DS_2018_P200_F200_Doongarra.Field.Report
  Simulation Walkamin_DS_2018_P200_F200_100_Doongarra
    Clock: Start=2018-01-01; End=2018-12-31
    Summary SummaryFile
    Weather: FileName=C:\2020_Try_model\weather\Walkiman.met
    SoilArbitrator
    Zone Field: Area=1; Slope=0; AspectAngle=0; Altitude=50
      Fertiliser
      Irrigation
      Soil SoilW: ASCOrder=Generic; ASCSubOrder=Generic; SoilType=Generic; Site=Walkamin; NearestTown=Walkamin; Region=Tableland; State=Queensland; Country=Australia; ApsoilNumber=497 Generic; Latitude=-17.1347; Longitude=145.4281; LocationAccuracy=+/- 20m; YearOfSampling=2018; DataSource=Agrigutures Rice project; Comments=2018-2020 Rice in the Northern Queensland project
        Physical
          Thickness  ParticleSizeClay  ParticleSizeSand  ParticleSizeSilt  BD     AirDry  LL15   DUL    SAT
          100        45                41                15                1.4    0.136   0.267  0.397  0.465
          200        58                33                8                 1.31   0.202   0.342  0.466  0.505
          200        65                30                5                 1.248  0.23    0.382  0.505  0.529
          400        63                31                6                 1.26   0.22    0.371  0.494  0.522
          300        64                29                7                 1.25   0.23    0.377  0.499  0.526
          SoilCrop RiceSoil: LL=[0.307, 0.369, 0.369, 0.41, 0.234]; KL=[0.06, 0.06, 0.05, 0.03, 0.03]; XF=[1, 1, 1, 1, 1]
        WaterBalance SoilWater: SummerDate=1-Nov; SummerU=5; SummerCona=5; WinterDate=1-Apr; WinterU=5; WinterCona=5; DiffusConst=40; DiffusSlope=16; Salb=0.12; CN2Bare=73; CNRed=20; CNCov=0.8; Thickness=[100, 200, 200, 400, 100, 100, 100]; SWCON=[1, 1, 1, 1, 0.8, 0.8, 0.8]
        Organic: FOMCNRatio=40
          Thickness  Carbon  SoilCNRatio  FBiom  FInert  FOM
          100        1.7     12           0.025  0.4     350.78
          200        1.7     12           0.025  0.4     651.805
          200        0.5     12           0.025  0.4     182.634
          400        0.5     12           0.025  0.4     368.78
          300        0.5     12           0.025  0.4     274.39
        Chemical
          Thickness  NO3N   NH4N   PH   EC
          100        1.071  2.149  5.5  0.04
          200        0.176  0.355  5.2  0.05
          200        0.228  0.441  5    0.02
          400        0.137  0.075  4.7  0.02
          300        0.184  0.368  4.5  0.02
        InitialWater: PercentMethod=1; FractionFull=1
        Sample InitialN: SWUnits=Volumetric; OCUnits=Total; PHUnits=Water
          Thickness  NO3    NH4   ESP
          100        1.5    3.03  5.5
          200        0.46   0.93  5.2
          200        0.57   1.1   5
          400        0.691  0.38  4.7
          300        0.691  1.38  4.5
        CERESSoilTemperature Temperature
        Nutrient
      SurfaceOrganicMatter: InitialResidueName=wheat_stubble; InitialResidueType=wheat; InitialResidueMass=0; InitialStandingFraction=0; InitialCPR=0; InitialCNR=100
      MicroClimate: a_interception=0; b_interception=1; c_interception=0; d_interception=0; SoilHeatFluxFraction=0.4; MinimumHeightDiffForNewLayer=0; NightInterceptionFraction=0.5; ReferenceHeight=2
      Manager SowingFertiliser: same as Brandon_DS_2018_P150_F200_100_Doongarra.Field.SowingFertiliser
      Manager Harvest: same as Brandon_DS_2018_P200_F200_Doongarra.Field.Harvest
      Manager Sow on a fixed date
        Crop = [Rice]
        SowDate = 6-jul
        CultivarName = Doongarra
        SowingDepth = 2.5
        RowSpacing = 200
        Population = 200
        script: same as in Brandon_DS_2018_P200_F200_Doongarra.Field.Sow on a fixed date
      Operations
        2018-09-21  [Fertiliser].Apply(00, Fertiliser.Types.NO3N, 50);
        2018-12-23  [Fertiliser].Apply(0, Fertiliser.Types.NO3N, 50);
        2018-12-23  [Fertiliser].Apply(0, Fertiliser.Types.NO3N, 50);
        2018-07-08  [Irrigation].Apply(25);
        2018-07-23  [Irrigation].Apply(25);
        2018-07-30  [Irrigation].Apply(25);
        2018-09-05  [Irrigation].Apply(25);
        2018-08-22  [Irrigation].Apply(25);
        2018-08-30  [Irrigation].Apply(25);
        2018-09-15  [Irrigation].Apply(25);
        2018-09-22  [Irrigation].Apply(25);
        2018-09-30  [Irrigation].Apply(25);
        2018-10-05  [Irrigation].Apply(25);
        2018-10-15  [Irrigation].Apply(25);
        2018-10-22  [Irrigation].Apply(25);
        2018-10-30  [Irrigation].Apply(25);
        2018-11-06  [Irrigation].Apply(25);
        2018-11-15  [Irrigation].Apply(25);
        2018-11-22  [Irrigation].Apply(25);
      Manager AutoIrrigation
        AutoIrrigationOn = True
        FASWThreshold = 0.9
        FASWDepth = 500
        script: same as in Brandon_DS_2018_P200_F200_Doongarra.Field.AutoIrrigation
      Plant Rice: ResourceName=Barley
      Report: same as Brandon_DS_2018_P200_F200_Doongarra.Field.Report
  Simulation Walkamin_DS_2018_P200_F200_80_Doongarra
    Clock: Start=2018-01-01; End=2018-12-31
    Summary SummaryFile
    Weather: FileName=C:\2020_Try_model\weather\Walkiman.met
    SoilArbitrator
    Zone Field: Area=1; Slope=0; AspectAngle=0; Altitude=50
      Fertiliser
      Irrigation
      Soil SoilW: same as Walkamin_DS_2018_P200_F200_100_Doongarra.Field.SoilW
      SurfaceOrganicMatter: InitialResidueName=wheat_stubble; InitialResidueType=wheat; InitialResidueMass=0; InitialStandingFraction=0; InitialCPR=0; InitialCNR=100
      MicroClimate: a_interception=0; b_interception=1; c_interception=0; d_interception=0; SoilHeatFluxFraction=0.4; MinimumHeightDiffForNewLayer=0; NightInterceptionFraction=0.5; ReferenceHeight=2
      Manager SowingFertiliser: same as Brandon_DS_2018_P150_F200_80_Doongarra.Field.SowingFertiliser
      Manager Harvest: same as Brandon_DS_2018_P200_F200_Doongarra.Field.Harvest
      Manager Sow on a fixed date: same as Walkamin_DS_2018_P200_F200_100_Doongarra.Field.Sow on a fixed date
      Operations
        2018-09-21  [Fertiliser].Apply(40, Fertiliser.Types.NO3N, 50);
        2018-12-23  [Fertiliser].Apply(0, Fertiliser.Types.NO3N, 50);
        2018-12-23  [Fertiliser].Apply(0, Fertiliser.Types.NO3N, 50);
        2018-07-08  [Irrigation].Apply(25);
        2018-07-23  [Irrigation].Apply(25);
        2018-07-30  [Irrigation].Apply(25);
        2018-09-05  [Irrigation].Apply(25);
        2018-08-22  [Irrigation].Apply(25);
        2018-08-30  [Irrigation].Apply(25);
        2018-09-15  [Irrigation].Apply(25);
        2018-09-22  [Irrigation].Apply(25);
        2018-09-30  [Irrigation].Apply(25);
        2018-10-05  [Irrigation].Apply(25);
        2018-10-15  [Irrigation].Apply(25);
        2018-10-22  [Irrigation].Apply(25);
        2018-10-30  [Irrigation].Apply(25);
        2018-11-06  [Irrigation].Apply(25);
        2018-11-15  [Irrigation].Apply(25);
        2018-11-22  [Irrigation].Apply(25);
      Manager AutoIrrigation: same as Walkamin_DS_2018_P200_F200_100_Doongarra.Field.AutoIrrigation
      Plant Rice: ResourceName=Barley
      Report: same as Brandon_DS_2018_P200_F200_Doongarra.Field.Report
  Simulation Walkamin_WS_2018_P200_F200_Doongarra
    Clock: Start=2018-01-01; End=2018-12-31
    Summary SummaryFile
    Weather: FileName=C:\2020_Try_model\weather\Walkiman.met
    SoilArbitrator
    Zone Field: Area=1; Slope=0; AspectAngle=0; Altitude=50
      Fertiliser
      Irrigation
      Soil SoilW: same as Walkamin_DS_2018_P200_F200_100_Doongarra.Field.SoilW
      SurfaceOrganicMatter: InitialResidueName=wheat_stubble; InitialResidueType=wheat; InitialResidueMass=0; InitialStandingFraction=0; InitialCPR=0; InitialCNR=100
      MicroClimate: a_interception=0; b_interception=1; c_interception=0; d_interception=0; SoilHeatFluxFraction=0.4; MinimumHeightDiffForNewLayer=0; NightInterceptionFraction=0.5; ReferenceHeight=2
      Manager SowingFertiliser: same as Brandon_DS_2018_P150_F200__0_Doongarra.Field.SowingFertiliser
      Manager Harvest: same as Brandon_DS_2018_P200_F200_Doongarra.Field.Harvest
      Manager Sow on a fixed date
        Crop = [Rice]
        SowDate = 2-jan
        CultivarName = Doongarra
        SowingDepth = 2.5
        RowSpacing = 200
        Population = 200
        script: same as in Brandon_DS_2018_P200_F200_Doongarra.Field.Sow on a fixed date
      Operations
        2018-01-15  [Fertiliser].Apply(100, Fertiliser.Types.NO3N, 25);
        2018-03-12  [Fertiliser].Apply(100, Fertiliser.Types.NO3N, 25);
        2018-12-23  [Fertiliser].Apply(0, Fertiliser.Types.NO3N, 50);
      Manager AutoIrrigation
        AutoIrrigationOn = False
        FASWThreshold = 0.99
        FASWDepth = 250
        script: same as in Brandon_DS_2018_P200_F200_Doongarra.Field.AutoIrrigation
      Plant Rice: ResourceName=Barley
      Report: same as Brandon_DS_2018_P200_F200_Doongarra.Field.Report
  Simulation Walkamin_WS_2018_P150_F200_0_Doongarra
    Clock: Start=2018-01-01; End=2018-12-31
    Summary SummaryFile
    Weather: FileName=C:\2020_Try_model\weather\Walkiman.met
    SoilArbitrator
    Zone Field: Area=1; Slope=0; AspectAngle=0; Altitude=50
      Fertiliser
      Irrigation
      Soil SoilW: same as Walkamin_DS_2018_P200_F200_100_Doongarra.Field.SoilW
      SurfaceOrganicMatter: InitialResidueName=wheat_stubble; InitialResidueType=wheat; InitialResidueMass=0; InitialStandingFraction=0; InitialCPR=0; InitialCNR=100
      MicroClimate: a_interception=0; b_interception=1; c_interception=0; d_interception=0; SoilHeatFluxFraction=0.4; MinimumHeightDiffForNewLayer=0; NightInterceptionFraction=0.5; ReferenceHeight=2
      Manager SowingFertiliser: same as Brandon_DS_2018_P150_F200__0_Doongarra.Field.SowingFertiliser
      Manager Harvest: same as Brandon_DS_2018_P200_F200_Doongarra.Field.Harvest
      Manager Sow on a fixed date
        Crop = [Rice]
        SowDate = 2-jan
        CultivarName = Doongarra
        SowingDepth = 2.5
        RowSpacing = 200
        Population = 150
        script: same as in Brandon_DS_2018_P200_F200_Doongarra.Field.Sow on a fixed date
      Operations
        2018-01-15  [Fertiliser].Apply(0, Fertiliser.Types.NO3N, 25);
        2018-03-12  [Fertiliser].Apply(200, Fertiliser.Types.NO3N, 25);
        2018-12-23  [Fertiliser].Apply(0, Fertiliser.Types.NO3N, 50);
      Manager AutoIrrigation: same as Walkamin_WS_2018_P200_F200_Doongarra.Field.AutoIrrigation
      Plant Rice: ResourceName=Barley
      Report: same as Brandon_DS_2018_P200_F200_Doongarra.Field.Report
  Simulation Walkamin_WS_2018_P150_F200_20_Doongarra
    Clock: Start=2018-01-01; End=2018-12-31
    Summary SummaryFile
    Weather: FileName=C:\2020_Try_model\weather\Walkiman.met
    SoilArbitrator
    Zone Field: Area=1; Slope=0; AspectAngle=0; Altitude=50
      Fertiliser
      Irrigation
      Soil SoilW: same as Walkamin_DS_2018_P200_F200_100_Doongarra.Field.SoilW
      SurfaceOrganicMatter: InitialResidueName=wheat_stubble; InitialResidueType=wheat; InitialResidueMass=0; InitialStandingFraction=0; InitialCPR=0; InitialCNR=100
      MicroClimate: a_interception=0; b_interception=1; c_interception=0; d_interception=0; SoilHeatFluxFraction=0.4; MinimumHeightDiffForNewLayer=0; NightInterceptionFraction=0.5; ReferenceHeight=2
      Manager SowingFertiliser: same as Brandon_DS_2018_P150_F200__0_Doongarra.Field.SowingFertiliser
      Manager Harvest: same as Brandon_DS_2018_P200_F200_Doongarra.Field.Harvest
      Manager Sow on a fixed date: same as Walkamin_WS_2018_P150_F200_0_Doongarra.Field.Sow on a fixed date
      Operations
        2018-01-15  [Fertiliser].Apply(40, Fertiliser.Types.NO3N, 25);
        2018-03-12  [Fertiliser].Apply(160, Fertiliser.Types.NO3N, 25);
        2018-12-23  [Fertiliser].Apply(0, Fertiliser.Types.NO3N, 50);
      Manager AutoIrrigation: same as Walkamin_WS_2018_P200_F200_Doongarra.Field.AutoIrrigation
      Plant Rice: ResourceName=Barley
      Report: same as Brandon_DS_2018_P200_F200_Doongarra.Field.Report
  Simulation Walkamin_WS_2018_P150_F200__80_Doongarra
    Clock: Start=2018-01-01; End=2018-12-31
    Summary SummaryFile
    Weather: FileName=C:\2020_Try_model\weather\Walkiman.met
    SoilArbitrator
    Zone Field: Area=1; Slope=0; AspectAngle=0; Altitude=50
      Fertiliser
      Irrigation
      Soil SoilW: same as Walkamin_DS_2018_P200_F200_100_Doongarra.Field.SoilW
      SurfaceOrganicMatter: InitialResidueName=wheat_stubble; InitialResidueType=wheat; InitialResidueMass=0; InitialStandingFraction=0; InitialCPR=0; InitialCNR=100
      MicroClimate: a_interception=0; b_interception=1; c_interception=0; d_interception=0; SoilHeatFluxFraction=0.4; MinimumHeightDiffForNewLayer=0; NightInterceptionFraction=0.5; ReferenceHeight=2
      Manager SowingFertiliser: same as Brandon_DS_2018_P150_F200__0_Doongarra.Field.SowingFertiliser
      Manager Harvest: same as Brandon_DS_2018_P200_F200_Doongarra.Field.Harvest
      Manager Sow on a fixed date: same as Walkamin_WS_2018_P150_F200_0_Doongarra.Field.Sow on a fixed date
      Operations
        2018-01-15  [Fertiliser].Apply(160, Fertiliser.Types.NO3N, 25);
        2018-03-12  [Fertiliser].Apply(40, Fertiliser.Types.NO3N, 25);
        2018-12-23  [Fertiliser].Apply(0, Fertiliser.Types.NO3N, 50);
      Manager AutoIrrigation: same as Walkamin_WS_2018_P200_F200_Doongarra.Field.AutoIrrigation
      Plant Rice: ResourceName=Barley
      Report: same as Brandon_DS_2018_P200_F200_Doongarra.Field.Report
  Simulation Walkamin_WS_2018_P150_F200_100_Doongarra: same as Walkamin_WS_2018_P150_F200_0_Doongarra
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