Simulations: Version=133
  Replacements
    Plant Rice: PlantType=Barley; IsAlive=false; IsEnding=false; DaysAfterEnding=0; ResourceName=Barley
      OrganArbitrator Arbitrator
        BiomassTypeArbitrator DMArbitration
          Folder PotentialPartitioningMethods
            ReallocationMethod
            AllocateFixationMethod
            RetranslocationMethod
            SendPotentialDMAllocationsMethod
          Folder AllocationMethods
            NutrientConstrainedAllocationMethod
            DryMatterAllocationsMethod
          RelativeAllocation ArbitrationMethod
        BiomassTypeArbitrator NArbitration
          Folder PotentialPartitioningMethods
            ReallocationMethod
          Folder ActualPartitioningMethods
            AllocateFixationMethod
            RetranslocationMethod
          Folder AllocationMethods
            NitrogenAllocationsMethod
          RelativeAllocation ArbitrationMethod
          AllocateUptakesMethod
        WaterUptakeMethod
        NitrogenUptakeMethod
      Phenology
        Memo
          Rice crop exhibits a range of developmental responses to environment and these are strongly influences by genotype characteristics and the genotype x environement and management interaction.
          Temperature affects development by increasing development rates and decreasing phase durations as temperatures increase.  These are captured by thermal time and variation of cardinal temperature with acclimation.  As rice crop do not have effect of vernalisation as cereals crops such Barley and Wheat, this effect is not accounted in the model.However  photoperiod sensitivities in its Vegetative phase and in the EarlyReproducivePhase are accounted.  Photoperiod responses are seen as a reduction in the length of a phase for a photoperiod sensitive genotype in response to a longer photoperiod ( meaning early occurrence of flowering time as sunshine duration of the day is greater than a threshold during the phase of photoperiod sesintivity phase of the plant which is from Panicle initiation to heading ( Basically the phylochrone of the leaf 9 to 13 is lower than the phyllochrone under shorter sunshien duration day the potential phyllochron for non sensitive crop).

          Based on counce et al represeanstion timing of anthesis is a result of the timing of flag leaf and an additional thermal time passage from there to anthesis during which phyllocron is a function day duration and temperature or amount of daily radiation cumulated.  It also assumes that timing of flag leaf is a result of the Final Leaf Number which sets a target thermal time cumulated, and leaf appearance rate, which sets the rate of progress toward this target.  Leaf appearance rate is a function of Thermal time and a genotype specific Phyllochron which changes with environmenatl conditions such water and nitrogen stress(Counce et al 2000)

          Final Leaf Number (FLN) is modeled as the sum of three numbers:

          FLN = MinLeafNumber + PhotoLeaves

          Where MinLeafNumber is the number of leaves that a rice crop will produce on its main step from emergence to  the stage ween growth is sensitive to long photoperiod.  PhotoLeaves are the number of leaves that are added to the minimum leaf number as a result of short day exposure.  For insensitive varieties this will be zero but it is higher than 1 for a maximum of 4 for more sensitivie varieties  with phyllochrone decreasing as day length increases.  More detailed explanations of the components of phenology are provided in the description.
        HourlyInterpolation ThermalTime: agregationMethod=0
          XYPairs Response: X=[-, 8, 28, 35]; Y=[-, 0, 20, 0]
          Memo
            Thermal time determines the rate of developmental progress through many of the crops phases and is used by organs to determing potential growth rates.
          ThreeHourSin InterpolationMethod
        PhotoperiodFunction Photoperiod: Twilight=-6; DayLength=0
        PhaseLookup PerceivedPhotoPeriod
          PhaseLookupValue ApexBelowGround: Start=Germination; End=Emergence
            Constant Photoperiod: FixedValue=0; Units=h
          PhaseLookupValue ApexAboveGround: Start=Emergence; End=HarvestRipe
            VariableReference Photoperiod: VariableName=[Phenology].Photoperiod
        Constant MinimumLeafNumber: FixedValue=9; Units=Leaves
          Memo
            Number of leaves the plant will produce when fully vernalised early and grown in long photoperiod
        Constant PpSensitivity: FixedValue=4; Units=Leaves
          Memo
            The reduction in leaf number going from 8 to 16 h Pp
        Constant EarlyReproductivePpSensitivity: FixedValue=8; Units=h
          Memo
            The phyllochrons duration for the plant to go from flag leaf ligual appearance at 16 h Pp compared to the phyllochron duration for the same phase at 8 h Pp.
        Constant EarlyReproductiveLongDayBase: FixedValue=12; Units=h
          Memo
            The phyllochrons duration for the plant to go from flag leaf ligual appearance at 16 h Pp.
        GerminatingPhase Germinating: Start=Sowing; End=Germination
        EmergingPhase Emerging: ShootLag=40; ShootRate=1; Start=Germination; End=Emergence; TTForTimeStep=0
          VariableReference ThermalTime: VariableName=[Phenology].ThermalTime
        GenericPhase Vegetative: Start=Emergence; End=TerminalSpikelet
          Memo
            The duration of the vegetative phase is set by a  the standard cumulated thermal time to produce the first 9 leaves  and ends at panicle initiation.
          VariableReference Progression: VariableName=[Phenology].ThermalTime
          MultiplyFunction Target
            VariableReference Phyllochron: VariableName=[Structure].MeanPhyllochron
            VariableReference HSTS: VariableName=[Structure].HaunStageTerminalSpikelet
          Memo Memo1
            Thermal time required for Panicle initiation stage increased as photoperiod extends, capturing the effect of these responses on the duration of the Vegetative phase
        LeafAppearancePhase StemElongation: Start=TerminalSpikelet; End=FlagLeaf
          Memo
            The Final leaf number is fixed at Terminal Spikelet and leaves continue to appear at a rate set by thermal time and phyllochron until flag leaf liguale appears and this phase is completed.
          VariableReference ThermalTime: VariableName=[Phenology].ThermalTime
          VariableReference FinalLeafNumber: VariableName=[Structure].FinalLeafNumber
          ExpressionFunction LeafNumber
            Expression=[Leaf].ExpandedCohortNo + [Leaf].NextExpandingLeafProportion
          VariableReference FullyExpandedLeafNo: VariableName=[Leaf].ExpandedCohortNo
          VariableReference InitialisedLeafNumber: VariableName=[Leaf].InitialisedCohortNo
        GenericPhase EarlyReproductive: Start=FlagLeaf; End=Flowering
          VariableReference Progression: VariableName=[Phenology].ThermalTime
          MultiplyFunction Target
            VariableReference Phyllochron: VariableName=[Structure].Phyllochron.BasePhyllochron
            AddFunction Phyllochrons
              VariableReference LongDayBase: VariableName=[Phenology].EarlyReproductiveLongDayBase
              MultiplyFunction IncreaseDueToShortPhotoPeriod
                LinearInterpolationFunction PhotoPeriodResponse
                  XYPairs: X=[8, 14]; Y=[1, 0]
                  VariableReference XValue: VariableName=[Phenology].Photoperiod
                VariableReference PpSensitivity: VariableName=[Phenology].EarlyReproductivePpSensitivity
        GenericPhase GrainDevelopment: Start=Flowering; End=StartGrainFill
          Constant Target: FixedValue=150; Units=dd
          VariableReference Progression: VariableName=[Phenology].ThermalTime
        GenericPhase GrainFilling: Start=StartGrainFill; End=EndGrainFill
          Constant Target: FixedValue=600; Units=dd
          VariableReference Progression: VariableName=[Phenology].ThermalTime
        GenericPhase Maturing: Start=EndGrainFill; End=Maturity
          Constant Target: FixedValue=50
          VariableReference Progression: VariableName=[Phenology].ThermalTime
        GenericPhase Ripening: Start=Maturity; End=HarvestRipe
          Constant Target: FixedValue=10
          VariableReference Progression: VariableName=[Phenology].ThermalTime
        EndPhase ReadyForHarvesting: Start=HarvestRipe; End=Unused
          VariableReference ThermalTime: VariableName=[Phenology].ThermalTime
        ZadokPMF Zadok
        OnEventFunction FlagLeafDAS: SetEvent=FlagLeaf; ReSetEvent=never
          Memo
            A function is used to provide flowering date as days after sowing(DAS).
          Constant PreEventValue: FixedValue=0
          VariableReference PostEventValue: VariableName=[Plant].DaysAfterSowing
        OnEventFunction FloweringDAS: SetEvent=Flowering; ReSetEvent=never
          Memo
            A function is used to provide flowering date as days after sowing(DAS).
          Constant PreEventValue: FixedValue=0
          VariableReference PostEventValue: VariableName=[Plant].DaysAfterSowing
        OnEventFunction MaturityDAS: SetEvent=Maturity; ReSetEvent=never
          Memo
            A function is used to provide maturity date as days after sowing(DAS).
          Constant PreEventValue: FixedValue=0
          VariableReference PostEventValue: VariableName=[Plant].DaysAfterSowing
      Structure: CohortInitialisationStage=Germination; LeafInitialisationStage=Emergence
        Memo Memo1
          Rice crop exhibits a range of developmental responses to environment and these are influenced by genotype characteristics and the interaction between genotype x environment and management.
          Nbr leaves in the main parameter driving the phenology and the transition from vegetative stage to reproductive stage.
          Phylochrone is dependent to temperature and sunshine duration but as well resources availability such water and nitrogen.
          Non stress affected biomass partitionning resulted to continuous phyllochrone process, limited biomass production due to water stress and N stress reduces leaf developememt (slow down of leaf production) and reduced growth of the leaves expansion.
           Similarly tiller production is proportional to conditions of developement and of growth and panicle formation and proprtion of productive tiller to non productive tiller.
          During reproductive stage, rate of grain fillig vs source size determined the number of grains to be filled resulting then to a simulation of number of grain unfilled based on a target number of grains produced under non stressed conditions in addition of constraints of spikelet fertility driven by temperature and conditions of  growth under water, nitrogen, salinity and other factors of stress.
        VariableReference ThermalTime: VariableName=[Phenology].ThermalTime
        MultiplyFunction Phyllochron
          Memo Rational
            This is the thermal time between the emergence of leaf tips where leaf appearace is described by a base phyllochrone determined between leaves 2 and 7 and a phyllochron that was 70% of base phyllochron for leaves < 2 and 130% of base phyllochron for leaves > 7 ([Jamieson_SIRIUS_1998]).  There is also a photoperiod effect to give larger phyllochrones in shorter photoperiods ([Miralles2000]) and lower phyllochrones in longer photoperiods and these are considered for the photoperiods sensitive leaves that range from 0 with no sensitivity to 4 with photosensitive variety.
          LinearInterpolationFunction LeafStageFactor
            XYPairs: X=[0, 2, 3, 7, 8, 11, 12]; Y=[0.75, 0.75, 1, 1, 1.4, 1.4, 1.4]
            VariableReference XValue: VariableName=[Leaf].AppearedCohortNo
          Constant BasePhyllochron: FixedValue=50; Units=oC.d
          LinearInterpolationFunction PhotoPeriodEffect
            XYPairs: X=[8, 12, 14]; Y=[2.2, 1, 1]
            VariableReference XValue: VariableName=[Phenology].Photoperiod
        MultiplyFunction BranchingRate
          Memo
            Potential branching rate is determined by the commonly observed pattern of tillering in Rice, in which each tiller emerges with the third leaf on its parent axis (e.g. first tiller emerges at the same time as the third leaf on the main stem, the first secondary tiller appears with the third leaf on tiller 1).  This is described as a simple function of main stem leaf number.
          PhaseLookup PotentialBranchingRate
            PhaseLookupValue Vegetative: Start=Emergence; End=FlagLeaf
              LinearInterpolationFunction PotentialBranchingRate
                XYPairs: X=[1, 1.9, 2, 3, 4, 5, 6, 7]; Y=[0, 0, 1, 2, 4, 7, 12, 20]
                VariableReference XValue: VariableName=[Structure].LeafTipsAppeared
            PhaseLookupValue Reproductive: Start=FlagLeaf; End=HarvestRipe
              Constant Zero: FixedValue=0
                MinimumFunction StressFactors
                  LinearInterpolationFunction NitrogenEffect
                    Memo
                      Inadequate Nitrogen supply is assumed to affect tillering prior to any effect on photosynthesis or leaf size.
                    XYPairs: X=[0.5, 2, 3]; Y=[0, 1, 1]
                    VariableReference XValue: VariableName=[Arbitrator].FN
                  LinearInterpolationFunction CoverEffect
                    Memo
                      Tillering is said to cease once a threshold fraction of incoming radiation has been achieved.  This captures shading effects on tillering described by [evers2006cessation].
                    XYPairs: X=[0, 0.9, 1]; Y=[1, 1, 0]
                    VariableReference XValue: VariableName=[Leaf].CoverTotal
                  LinearInterpolationFunction WaterStressEffect
                    XYPairs: X=[0, 1]; Y=[0, 1]
                    VariableReference XValue: VariableName=[Root].WaterTensionFactor
          MinimumFunction StressFactors
            LinearInterpolationFunction NitrogenEffect: same as Replacements.Rice.Structure.BranchingRate.PotentialBranchingRate.Reproductive.Zero.StressFactors.NitrogenEffect
            LinearInterpolationFunction CoverEffect
              Memo
                Tillering is said to cease once a threshold fraction of incoming radiation has been achieved to captures shading effects on tillering ([evers2006cessation]).
              XYPairs: X=[0, 0.35, 0.5]; Y=[1, 1, 0]
              VariableReference XValue: VariableName=[Leaf].CoverTotal
            LinearInterpolationFunction WaterStressEffect
              XYPairs: X=[0, 0.75, 0.9, 1]; Y=[0, 0, 1, 1]
              VariableReference XValue: VariableName=[Root].PlantWaterPotentialFactor
        PhaseLookup BranchMortality
          PhaseLookupValue MortalityPhase: Start=TerminalSpikelet; End=Flowering
            MultiplyFunction Mortality
              LinearInterpolationFunction MortalityPerDegDay
                XYPairs: X=[0, 0.005]; Y=[0.004, 0]
                VariableReference XValue: VariableName=[Structure].MeanTillerGrowthRate
              VariableReference ThermalTime: VariableName=[Phenology].ThermalTime
        HeightFunction HeightModel
          LinearInterpolationFunction PotentialHeight
            XYPairs: X=[3, 4, 5, 6, 7]; Y=[10, 200, 1000, 1100, 1200]
            VariableReference XValue: VariableName=[Phenology].Stage
          LinearInterpolationFunction WaterStress
            XYPairs: X=[0.3, 1]; Y=[0, 1]
            VariableReference XValue: VariableName=[Leaf].Fw
        MovingAverageFunction MeanTillerGrowthRate: NumberOfDays=5; StageToStartMovingAverage=Emergence
          Memo
            This is calculated to represent the supply of asslimilate to individual tillers over the past 5 days to use as an index to determine tiller mortality.  When tiller numbers are high or total crop assimilate supply is small there will not be enough assimilate to maintain all of the tillers so the model will senesce some.
          DivideFunction TillerGrowthRate
            VariableReference DailyGrowth: VariableName=[Arbitrator].DM.TotalFixationSupply
            VariableReference ThermalTime: VariableName=[Phenology].ThermalTime
            VariableReference StemPopulation: VariableName=[Structure].TotalStemPopn
        MovingAverageFunction MeanPhyllochron: NumberOfDays=300; StageToStartMovingAverage=Emergence
          VariableReference Phyllochron: VariableName=[Structure].Phyllochron
        HoldFunction FinalLeafNumber: WhenToHold=TerminalSpikelet
          AddFunction FinalNodeNumber
            VariableReference MinLeafNumber: VariableName=[Phenology].MinimumLeafNumber
            MultiplyFunction PhotoPLeaves
              VariableReference ShortPpLeaves: VariableName=[Phenology].PpSensitivity
              LinearInterpolationFunction PhotoPeriodReductionFactor
                XYPairs: X=[8, 14]; Y=[1, 0]
                VariableReference XValue: VariableName=[Phenology].Photoperiod
        ExpressionFunction HaunStageTerminalSpikelet: Expression=[Structure].FinalLeafNumber * 0.6708 - 1.1
          Memo
            The Haun stage at which Terminal Spikelet occurs is determined from final leaf number using the approach described in [Brown_Anthesis_2013].  Coefficients for barley come from [Paynter_2004].
        AddFunction HaunStage
          VariableReference AppearedLeaves: VariableName=[Leaf].ExpandedCohortNo
          VariableReference ProportionOfExpandingLeaf: VariableName=[Leaf].NextExpandingLeafProportion
        Constant StemSenescenceAge: FixedValue=0
      ReproductiveOrgan Grain: GrowthRespiration=0; MaintenanceRespiration=0; RipeStage=Ripe
        Biomass Live: DMDOfStructural=0.6
        Biomass Dead: DMDOfStructural=0.6
        HoldFunction NumberFunction: WhenToHold=Flowering
          MultiplyFunction GrainNumber
            Constant GrainsPerGramOfStem: FixedValue=29; Units=grains
            VariableReference StemMass: VariableName=[StemPlusSpike].Wt
        Constant InitialGrainProportion: FixedValue=0.05
        Constant MaximumPotentialGrainSize: FixedValue=0.029; Units=g
        PhaseLookup DMDemandFunction
          PhaseLookupValue InitialPhase: Start=Flowering; End=StartGrainFill
            FillingRateFunction
              VariableReference NumberFunction: VariableName=[Grain].NumberFunction
              VariableReference FillingDuration: VariableName=[Phenology].GrainDevelopment.Target
              VariableReference ThermalTime: VariableName=[Phenology].ThermalTime
              MultiplyFunction PotentialSizeIncrement
                VariableReference InitialProportion: VariableName=[Grain].InitialGrainProportion
                VariableReference MaximumSize: VariableName=[Grain].MaximumPotentialGrainSize
          PhaseLookupValue LinearPhase: Start=StartGrainFill; End=EndGrainFill
            FillingRateFunction
              VariableReference NumberFunction: VariableName=[Grain].NumberFunction
              VariableReference FillingDuration: VariableName=[Phenology].GrainFilling.Target
              VariableReference ThermalTime: VariableName=[Phenology].ThermalTime
              MultiplyFunction PotentialSizeIncrement
                SubtractFunction ProportionLinearPhase
                  Constant One: FixedValue=1
                  VariableReference InitialProportion: VariableName=[Grain].InitialGrainProportion
                VariableReference MaximumSize: VariableName=[Grain].MaximumPotentialGrainSize
        Constant MinimumNConc: FixedValue=0.01
        Constant MaxNConcDailyGrowth: FixedValue=0.02
        Constant MaximumNConc: FixedValue=0.02
        PhaseLookup NFillingRate
          PhaseLookupValue GrainFilling: Start=Flowering; End=EndGrainFill
            FillingRateFunction
              VariableReference NumberFunction: VariableName=[Grain].NumberFunction
              AddFunction FillingDuration
                VariableReference FloweringToGrainFilling: VariableName=[Phenology].GrainDevelopment.Target
                VariableReference GrainFilling: VariableName=[Phenology].GrainFilling.Target
              VariableReference ThermalTime: VariableName=[Phenology].ThermalTime
              MultiplyFunction PotentialSizeIncrement
                VariableReference MaximumSize: VariableName=[Grain].MaximumPotentialGrainSize
                VariableReference MaximumNConc: VariableName=[Grain].MaximumNConc
        Constant WaterContent: FixedValue=0.14
        AccumulateFunction AccumThermalTime: StartStageName=Flowering; EndStageName=Maturity; FractionRemovedOnCut=0; FractionRemovedOnHarvest=0; FractionRemovedOnGraze=0; FractionRemovedOnPrune=0
          VariableReference DailyThermalTimeValue: VariableName=[Phenology].ThermalTime
        ExpressionFunction Protein
          Expression=([Grain].Live.N + [Grain].Dead.N)/([Grain].Live.Wt + [Grain].Dead.Wt) * 100 * 5.71
        BiomassRemoval BiomassRemovalDefaults
          OrganBiomassRemovalType Harvest: FractionLiveToRemove=1; FractionDeadToRemove=0; FractionLiveToResidue=0; FractionDeadToResidue=0
          OrganBiomassRemovalType Cut: FractionLiveToRemove=1; FractionDeadToRemove=0; FractionLiveToResidue=0; FractionDeadToResidue=0
          OrganBiomassRemovalType Prune: FractionLiveToRemove=0; FractionDeadToRemove=0; FractionLiveToResidue=0.8; FractionDeadToResidue=0
          OrganBiomassRemovalType Graze: FractionLiveToRemove=0.6; FractionDeadToRemove=0; FractionLiveToResidue=0.2; FractionDeadToResidue=0
          OrganBiomassRemovalType Thin: FractionLiveToRemove=0; FractionDeadToRemove=0; FractionLiveToResidue=0.05; FractionDeadToResidue=0
        Constant DMConversionEfficiency: FixedValue=1
        Constant RemobilisationCost: FixedValue=0
        Constant CarbonConcentration: FixedValue=0.4
      Root: GrowthRespiration=0; MaintenanceRespiration=0
        RootShapeCylindre RootShape
        Constant KLModifier: FixedValue=1
        Constant SoilWaterEffect: FixedValue=1
        Constant MaxDailyNUptake: FixedValue=20
        Constant SenescenceRate: FixedValue=0.005
        Constant MaximumRootDepth: FixedValue=100
        Constant MaximumNConc: FixedValue=0.01
        Constant MinimumNConc: FixedValue=0.01
        PhaseLookupValue NitrogenDemandSwitch: Start=Germination; End=Maturity
          Constant: FixedValue=1
        BiomassRemoval BiomassRemovalDefaults
          OrganBiomassRemovalType Harvest: FractionLiveToRemove=0; FractionDeadToRemove=0; FractionLiveToResidue=0.2; FractionDeadToResidue=0
          OrganBiomassRemovalType Cut: FractionLiveToRemove=0; FractionDeadToRemove=0; FractionLiveToResidue=0.3; FractionDeadToResidue=0
          OrganBiomassRemovalType Prune: FractionLiveToRemove=0; FractionDeadToRemove=0; FractionLiveToResidue=0.1; FractionDeadToResidue=0
          OrganBiomassRemovalType Graze: FractionLiveToRemove=0; FractionDeadToRemove=0; FractionLiveToResidue=0.15; FractionDeadToResidue=0
          OrganBiomassRemovalType Thin: FractionLiveToRemove=0; FractionDeadToRemove=0; FractionLiveToResidue=0.05; FractionDeadToResidue=0
        Constant KNO3: FixedValue=0.02
        Constant KNH4: FixedValue=0.01
        Constant SpecificRootLength: FixedValue=105; Units=m/g
        MultiplyFunction RootFrontVelocity
          PhaseLookup PotentialRootFrontVelocity
            PhaseLookupValue PreEmergence: Start=Germination; End=Emergence
              Constant Value: FixedValue=5; Units=mm/d
            PhaseLookupValue PostEmergence: Start=Emergence; End=Maturity
              Constant Value: FixedValue=20; Units=mm/d
          WeightedTemperatureFunction TemperatureFactor: MaximumTemperatureWeighting=0.5
            XYPairs: X=[0, 15, 25, 35]; Y=[0, 1, 1, 0]
          LinearInterpolationFunction WaterFactor
            SoilWaterScale
            XYPairs: X=[0, 0.25, 1]; Y=[0, 1, 1]
            VariableReference XValue: VariableName=[SoilWaterScale]
        LinearInterpolationFunction NUptakeSWFactor
          SoilWaterScale
          XYPairs: X=[0, 1]; Y=[0, 1]
          Memo
            This representation is assuming that  potential N uptake is decreased as the soil dries as described by NUptakeSWFactor
          VariableReference XValue: VariableName=[SoilWaterScale]
        Constant DMConversionEfficiency: FixedValue=1
        Constant MaintenanceRespirationFunction: FixedValue=1
        Constant RemobilisationCost: FixedValue=0
        Constant CarbonConcentration: FixedValue=0.4
        BiomassDemand DMDemands
          MultiplyFunction Structural
            PartitionFractionDemandFunction DMDemandFunction
              PhaseLookup PartitionFraction
                PhaseLookupValue PreEmergence: Start=Germination; End=Emergence
                  Constant Value: FixedValue=0.1
                PhaseLookupValue PreFlowering: Start=Emergence; End=Flowering
                  LinearInterpolationFunction AgeFactor
                    XYPairs: X=[3, 4]; Y=[0.5, 0.2]
                    VariableReference XValue: VariableName=[Phenology].Stage
                PhaseLookupValue PostFlowering: Start=Flowering; End=EndGrainFill
                  Constant Value: FixedValue=0.2
            Constant StructuralFraction: FixedValue=1
          Constant Metabolic: FixedValue=0
          StorageDMDemandFunction Storage
            SubtractFunction StorageFraction
              Constant One: FixedValue=1
              VariableReference StructuralFraction: VariableName=[Root].DMDemands.Structural.StructuralFraction
        BiomassDemand NDemands
          MultiplyFunction Structural
            VariableReference MinNconc: VariableName=[Root].minimumNconc
            VariableReference PotentialDMAllocation: VariableName=[Root].NDemands.Structural.potentialDMAllocation
          MultiplyFunction Metabolic
            SubtractFunction MetabolicNconc
              VariableReference CritNconc: VariableName=[Root].criticalNConc
              VariableReference MinNconc: VariableName=[Root].minimumNconc
            VariableReference PotentialDMAllocation: VariableName=[Root].NDemands.Structural.potentialDMAllocation
          StorageNDemandFunction Storage
            VariableReference NitrogenDemandSwitch: VariableName=[Root].nitrogenDemandSwitch
            VariableReference MaxNconc: VariableName=[Root].maximumNconc
        VariableReference CriticalNConc: VariableName=[Root].MinimumNConc
        BiomassDemand InitialWt
          Constant Structural: FixedValue=0.005; Units=g/plant
          Constant Metabolic: FixedValue=0
          Constant Storage: FixedValue=0
        Constant RootDepthStressFactor: FixedValue=1
      Leaf: MaxCover=1; Albedo=0.25; Gsmax350=0.011; R50=150; KDead=0.1; MaximumMainStemLeafNumber=30
        zero: CurrentExpandingLeaf, StartFractionExpanded, FractionNextleafExpanded, DeadNodesYesterday, GrowthRespiration, LAI, Depth, Width, FRGR, PotentialEP, WaterDemand, TipsAtEmergence, CohortsAtInitialisation, FractionDied
        LeafCohort InitialLeaves[1]: Rank=1; Area=200
          zero: NReallocationFactor, DMReallocationFactor, NRetranslocationFactor, DMRetranslocationFactor, ShadeInducedSenRate, SenescedFrac, DeltaPotentialArea, DeltaStressConstrainedArea, DeltaCarbonConstrainedArea, PotentialStructuralDMAllocation, PotentialMetabolicDMAllocation, MetabolicNReallocated, MetabolicWtReallocated, StorageNReallocated, StorageWtReallocated, MetabolicNRetranslocated, StorageNRetrasnlocated, DMRetranslocated, MetabolicNAllocation, StructuralDMAllocation, MetabolicDMAllocation, MaintenanceRespiration
        LeafCohort InitialLeaves[2]: Rank=2; Area=200
          zero: NReallocationFactor, DMReallocationFactor, NRetranslocationFactor, DMRetranslocationFactor, ShadeInducedSenRate, SenescedFrac, DeltaPotentialArea, DeltaStressConstrainedArea, DeltaCarbonConstrainedArea, PotentialStructuralDMAllocation, PotentialMetabolicDMAllocation, MetabolicNReallocated, MetabolicWtReallocated, StorageNReallocated, StorageWtReallocated, MetabolicNRetranslocated, StorageNRetrasnlocated, DMRetranslocated, MetabolicNAllocation, StructuralDMAllocation, MetabolicDMAllocation, MaintenanceRespiration
        LeafCohortParameters CohortParameters: ExpansionStressValue=0; CellDivisionStressValue=0; LagAccelerationValue=0; SenescenceAccelerationValue=0; ShadeInducedSenescenceRateValue=0; SenessingLeafRelativeSizeValue=0
          Constant NReallocationFactor: FixedValue=1
          Constant MaintenanceRespirationFunction: FixedValue=0
          Constant NRetranslocationFactor: FixedValue=0.03
          Constant DMReallocationFactor: FixedValue=1
          Constant DMRetranslocationFactor: FixedValue=0.03
          MinimumFunction CellDivisionStress
            LinearInterpolationFunction WaterStressEffect
              XYPairs: X=[0.5, 1]; Y=[0.1, 1]
              VariableReference XValue: VariableName=[Leaf].Fw
            LinearInterpolationFunction NitrogenStressEffect
              XYPairs: X=[0, 0.5, 1]; Y=[0.1, 0.1, 1]
              VariableReference XValue: VariableName=[Rice].Leaf.Fn
          MinimumFunction ExpansionStress
            LinearInterpolationFunction WaterStressEffect
              XYPairs: X=[0.1, 1, 1.3]; Y=[0, 1, 1]
              VariableReference XValue: VariableName=[Root].WaterTensionFactor
            LinearInterpolationFunction NitrogenStressEffect
              XYPairs: X=[0, 0.5, 1]; Y=[0.1, 0.1, 1]
              VariableReference XValue: VariableName=[Rice].Leaf.Fn
          MultiplyFunction MaxArea
            Constant AreaLargestLeaves: FixedValue=2000; Units=mm^2
            LinearInterpolationFunction AgeFactor
              XYPairs: X=[3, 3.6, 4.2, 5]; Y=[0.1, 0.5, 1, 0.4]
              Memo
                The AgeFactor has the effect of increasing leaf size from a minimum for the first leaf appeared to a maximum for leaves that appear soon after TerminalSpikelet and then decreasing again for leaves appearing between TerminalSpikelet and FlagLeaf
              VariableReference XValue: VariableName=[Phenology].Stage
          MultiplyFunction GrowthDuration
            Constant Multiplier: FixedValue=1.3
            VariableReference Phyllochron: VariableName=[Structure].Phyllochron
          MultiplyFunction LagDuration
            SubtractFunction LastLeafDuration
              AddFunction ThermalTimeToRipe
                VariableReference EarlyReproductive: VariableName=[Phenology].EarlyReproductive.Target
                VariableReference GrainDevelopment: VariableName=[Phenology].GrainDevelopment.Target
                VariableReference GrainFilling: VariableName=[Phenology].GrainFilling.Target
                VariableReference Maturing: VariableName=[Phenology].Maturing.Target
                VariableReference Ripening: VariableName=[Phenology].Ripening.Target
              VariableReference SenescenceDuration: VariableName=[Leaf].CohortParameters.SenescenceDuration
            LinearInterpolationFunction AgeFactor
              XYPairs: X=[3, 4.6, 5]; Y=[0.4, 1, 1]
              Memo
                The AgeFactor causes the later appeared leaves to remain at their maximum area for longer than the earlier leaves.
              VariableReference XValue: VariableName=[Phenology].Stage
          MultiplyFunction SenescenceDuration
            Constant Multiplier: FixedValue=2
            VariableReference Phyllochron: VariableName=[Structure].Phyllochron
          Constant DetachmentLagDuration: FixedValue=1000000
          Constant DetachmentDuration: FixedValue=1000000
          Constant RelativeBranchLeafSize: FixedValue=1
          LinearInterpolationFunction MaximumNConc
            XYPairs: X=[3, 4, 6]; Y=[0.08, 0.05, 0.02]
            VariableReference XValue: VariableName=[Phenology].Stage
          MultiplyFunction CriticalNConc
            LinearInterpolationFunction CriticalNConcAt350ppm
              XYPairs: X=[3, 4, 6]; Y=[0.07, 0.04, 0.015]
              VariableReference XValue: VariableName=[Phenology].Stage
            LinearInterpolationFunction CO2Factor
              XYPairs: X=[350, 700]; Y=[1, 0.93]
              VariableReference XValue: VariableName=[Weather].CO2
          LinearInterpolationFunction MinimumNConc
            XYPairs: X=[3, 4, 6]; Y=[0.01, 0.005, 0.005]
            VariableReference XValue: VariableName=[Phenology].Stage
          AddFunction LagAcceleration
            Constant One: FixedValue=1
            MultiplyFunction Stress
              Constant StressResponseCoefficient: FixedValue=1
              LinearInterpolationFunction StressFactor
                XYPairs: X=[0, 1]; Y=[1, 0]
                VariableReference XValue: VariableName=[Leaf].Fw
          AddFunction SenescenceAcceleration: same as Replacements.Rice.Leaf.CohortParameters.LagAcceleration
          LinearInterpolationFunction SpecificLeafAreaMax
            XYPairs: X=[3, 4]; Y=[30000, 35000]
            VariableReference XValue: VariableName=[Phenology].Stage
          LinearInterpolationFunction SpecificLeafAreaMin
            XYPairs: X=[0.4, 1]; Y=[15000, 18000]
            VariableReference XValue: VariableName=[Leaf].Fn
          Constant InitialNConc: FixedValue=0
          Constant StructuralFraction: FixedValue=0.1
          Constant StorageFraction: FixedValue=0
          Constant LeafSizeShapeParameter: FixedValue=0.3
          Constant SenessingLeafRelativeSize: FixedValue=1; Units=0-1
          MultiplyFunction ShadeInducedSenescenceRate
            LinearInterpolationFunction CoverEffect
              XYPairs: X=[0, 0.9, 0.95, 1]; Y=[0, 0, 0.01, 0.03]
              VariableReference XValue: VariableName=[Leaf].CohortCurrentRankCoverAbove
            VariableReference ThermalTime: VariableName=[Phenology].ThermalTime
          ArrayFunction LagDurationAgeMultiplier: Values=1 1 1
          ArrayFunction SenescenceDurationAgeMultiplier: Values=1 1 1
          ArrayFunction LeafSizeAgeMultiplier: Values=1 1 1 1 1 1 1 1 1 1 1 1
          Constant RemobilisationCost: FixedValue=0
          Constant CarbonConcentration: FixedValue=0.4
        RUEModel Photosynthesis
          Constant RUE: FixedValue=1.5
          WeightedTemperatureFunction FT: MaximumTemperatureWeighting=0.75
            XYPairs: X=[0, 20, 30, 35]; Y=[0, 1, 1, 0]
          LinearInterpolationFunction FN
            XYPairs: X=[0, 1, 1.5]; Y=[0, 1, 1]
            VariableReference XValue: VariableName=[Leaf].Fn
          LinearInterpolationFunction FW
            XYPairs: X=[0, 0.7, 1]; Y=[0, 1, 1]
            VariableReference XValue: VariableName=[Leaf].Fw
          LinearInterpolationFunction FVPD
            XYPairs: X=[0, 10, 40]; Y=[1, 1, 0]
            VariableReference XValue: VariableName=[Photosynthesis].VPD
          RUECO2Function FCO2: PhotosyntheticPathway=C3
          VariableReference RadnInt: VariableName=[Leaf].RadiationIntercepted
        Constant FrostFraction: FixedValue=0
        VariableReference ThermalTime: VariableName=[Phenology].ThermalTime
        MinimumFunction FRGRFunction
          VariableReference RUE_FT: VariableName=[Leaf].Photosynthesis.FT
          MinimumFunction Others
            VariableReference RUE_FN: VariableName=[Leaf].Photosynthesis.FN
            VariableReference RUE_FVPD: VariableName=[Leaf].Photosynthesis.FVPD
        BiomassRemoval BiomassRemovalDefaults
          OrganBiomassRemovalType Harvest: FractionLiveToRemove=0; FractionDeadToRemove=0; FractionLiveToResidue=0.3; FractionDeadToResidue=0.3
          OrganBiomassRemovalType Cut: FractionLiveToRemove=0.8; FractionDeadToRemove=0.8; FractionLiveToResidue=0; FractionDeadToResidue=0
          OrganBiomassRemovalType Prune: FractionLiveToRemove=0; FractionDeadToRemove=0; FractionLiveToResidue=0.6; FractionDeadToResidue=0.6
          OrganBiomassRemovalType Graze: FractionLiveToRemove=0.6; FractionDeadToRemove=0.6; FractionLiveToResidue=0.1; FractionDeadToResidue=0.1
          OrganBiomassRemovalType Thin: FractionLiveToRemove=0; FractionDeadToRemove=0; FractionLiveToResidue=0.05; FractionDeadToResidue=0.05
        Constant ExtinctionCoeff: FixedValue=0.6
        Constant StructuralFraction: FixedValue=0.5
        Constant DMConversionEfficiency: FixedValue=1
        Constant RemobilisationCost: FixedValue=0
        Constant CarbonConcentration: FixedValue=0.4
        Constant StomatalConductanceCO2Modifier: FixedValue=1
        DivideFunction StomatalConductanceCO2Modifier1
          VariableReference FCO2: VariableName=[Leaf].Photosynthesis.FCO2
          ExpressionFunction RelativeCO2Gradient
            Expression=([IWeather].CO2 - [Leaf].CO2internal)/(350 - [Leaf].CO2internal)
        ExpressionFunction CO2internal: Expression=(163 - [IWeather].MeanT)/(5 - 0.1*[IWeather].MeanT)
        Constant WidthFunction: FixedValue=0
        VariableReference DepthFunction: VariableName=[Leaf].Height
      GenericOrgan Spike: IsAboveGround=true
        Constant NReallocationFactor: FixedValue=0
        Constant NRetranslocationFactor: FixedValue=0.3
        Constant MaximumNConc: FixedValue=0.015
        Constant SenescenceRate: FixedValue=0; Units=/d
        Constant MinimumNConc: FixedValue=0.004
        BiomassRemoval BiomassRemovalDefaults
          OrganBiomassRemovalType Harvest: FractionLiveToRemove=0.5; FractionDeadToRemove=0; FractionLiveToResidue=0.1; FractionDeadToResidue=0
          OrganBiomassRemovalType Cut: FractionLiveToRemove=0.8; FractionDeadToRemove=0; FractionLiveToResidue=0; FractionDeadToResidue=0
          OrganBiomassRemovalType Prune: FractionLiveToRemove=0; FractionDeadToRemove=0; FractionLiveToResidue=0.6; FractionDeadToResidue=0
          OrganBiomassRemovalType Graze: FractionLiveToRemove=0.6; FractionDeadToRemove=0; FractionLiveToResidue=0.2; FractionDeadToResidue=0
          OrganBiomassRemovalType Thin: FractionLiveToRemove=0; FractionDeadToRemove=0; FractionLiveToResidue=0.05; FractionDeadToResidue=0
        PhaseLookupValue NitrogenDemandSwitch: Start=Emergence; End=StartGrainFill
          Constant: FixedValue=1
        PhaseLookup DMRetranslocationFactor
          PhaseLookupValue VegetativeGrowth: Start=Emergence; End=StartGrainFill
            Constant DMRetranslocationFactor: FixedValue=0
          PhaseLookupValue ReproductiveGrowth: Start=StartGrainFill; End=EndGrainFill
            Constant DMRetranslocationFactor: FixedValue=0.5
        Constant DetachmentRateFunction: FixedValue=0; Units=/d
        Constant MaintenanceRespirationFunction: FixedValue=0; Units=0-1
        Constant DMConversionEfficiency: FixedValue=1; Units=0-1
        VariableReference HeadNumber: VariableName=[Structure].TotalStemPopn
        Constant DMReallocationFactor: FixedValue=0
        VariableReference CriticalNConc: VariableName=[Spike].MinimumNConc
        Constant RemobilisationCost: FixedValue=0
        Constant CarbonConcentration: FixedValue=0.4
        BiomassDemand DMDemands
          MultiplyFunction Structural
            PopulationBasedDemandFunction DMDemandFunction
              VariableReference ThermalTime: VariableName=[Phenology].ThermalTime
              Constant ExpansionStress: FixedValue=1
              VariableReference OrganPopulation: VariableName=[Spike].HeadNumber
              Constant StartStage: FixedValue=5
              Constant MaximumOrganWt: FixedValue=0.25
              AddFunction GrowthDuration
                VariableReference EarlyReproductive: VariableName=[Phenology].EarlyReproductive.Target
                VariableReference GrainDevelopment: VariableName=[Phenology].GrainDevelopment.Target
            Constant StructuralFraction: FixedValue=0.9
          Constant Metabolic: FixedValue=0
          StorageDMDemandFunction Storage
            SubtractFunction StorageFraction
              Constant One: FixedValue=1
              VariableReference StructuralFraction: VariableName=[Spike].DMDemands.Structural.StructuralFraction
        BiomassDemand NDemands
          MultiplyFunction Structural
            VariableReference MinNconc: VariableName=[Spike].minimumNconc
            VariableReference PotentialDMAllocation: VariableName=[Spike].potentialDMAllocation.Structural
          MultiplyFunction Metabolic
            SubtractFunction MetabolicNconc
              VariableReference CritNconc: VariableName=[Spike].criticalNConc
              VariableReference MinNconc: VariableName=[Spike].minimumNconc
            VariableReference PotentialDMAllocation: VariableName=[Spike].potentialDMAllocation.Structural
          StorageNDemandFunction Storage
            VariableReference NitrogenDemandSwitch: VariableName=[Spike].nitrogenDemandSwitch
            VariableReference MaxNconc: VariableName=[Spike].maximumNconc
        RetranslocateNonStructural RetranslocateNitrogen
        BiomassDemand InitialWt
          Constant Structural: FixedValue=0; Units=g/m^2
          Constant Metabolic: FixedValue=0
          Constant Storage: FixedValue=0
        Constant Photosynthesis: FixedValue=0
        VariableReference initialNConcFunction: VariableName=[Spike].MinimumNConc
        BiomassDemand dmDemandPriorityFactors
          Constant Structural: FixedValue=1
          Constant Metabolic: FixedValue=1
          Constant Storage: FixedValue=1
      GenericOrgan Stem: IsAboveGround=true
        Constant SenescenceRate: FixedValue=0; Units=/d
        LinearInterpolationFunction MaximumNConc
          XYPairs: X=[3, 4, 5, 6]; Y=[0.07, 0.04, 0.015, 0.012]
          VariableReference XValue: VariableName=[Phenology].Stage
        Constant MinimumNConc: FixedValue=0.0025
        PhaseLookupValue NitrogenDemandSwitch: Start=Emergence; End=StartGrainFill
          Constant: FixedValue=1
        Constant NReallocationFactor: FixedValue=0
        PhaseLookup NRetranslocationFactor
          PhaseLookupValue VegetativeGrowth: Start=Sowing; End=Flowering
            Constant Fraction: FixedValue=0
          PhaseLookupValue ReproductiveGrowth: Start=Flowering; End=HarvestRipe
            Constant Fraction: FixedValue=0.5
        PhaseLookup DMRetranslocationFactor
          PhaseLookupValue VegetativeGrowth: Start=Emergence; End=StartGrainFill
            Constant DMRetranslocationFactor: FixedValue=0
          PhaseLookupValue ReproductiveGrowth: Start=StartGrainFill; End=EndGrainFill
            Constant DMRetranslocationFactor: FixedValue=0.05
        BiomassRemoval BiomassRemovalDefaults: same as Replacements.Rice.Spike.BiomassRemovalDefaults
        DivideFunction PercentWSC
          VariableReference WSC: VariableName=[Stem].Live.StorageWt
          VariableReference StemWt: VariableName=[Stem].Live.Wt
        Constant DetachmentRateFunction: FixedValue=0; Units=/d
        Constant MaintenanceRespirationFunction: FixedValue=0; Units=0-1
        Constant DMConversionEfficiency: FixedValue=1; Units=0-1
        Constant DMReallocationFactor: FixedValue=0
        VariableReference CriticalNConc: VariableName=[Stem].MinimumNConc
        Constant RemobilisationCost: FixedValue=0
        Constant CarbonConcentration: FixedValue=0.4
        BiomassDemand DMDemands
          MultiplyFunction Structural
            PartitionFractionDemandFunction DMDemandFunction
              PhaseLookup PartitionFraction
                PhaseLookupValue PreStemElongation: Start=Emergence; End=TerminalSpikelet
                  Constant StemFraction: FixedValue=0.2
                PhaseLookupValue StemElongation: Start=TerminalSpikelet; End=StartGrainFill
                  Constant StemFraction: FixedValue=0.7
                PhaseLookupValue EarEmergence: Start=StartGrainFill; End=Maturity
                  Constant StemFraction: FixedValue=0.6
            PhaseLookup StructuralFraction
              PhaseLookupValue VegetativeGrowth: Start=Sowing; End=FlagLeaf
                Constant Fraction: FixedValue=0.7
              PhaseLookupValue ReproductiveGrowth: Start=FlagLeaf; End=HarvestRipe
                Constant Fraction: FixedValue=0.05
          Constant Metabolic: FixedValue=0
          StorageDMDemandFunction Storage
            SubtractFunction StorageFraction
              Constant One: FixedValue=1
              VariableReference StructuralFraction: VariableName=[Stem].DMDemands.Structural.StructuralFraction
        BiomassDemand NDemands
          MultiplyFunction Structural
            VariableReference MinNconc: VariableName=[Stem].minimumNconc
            VariableReference PotentialDMAllocation: VariableName=[Stem].potentialDMAllocation.Structural
          MultiplyFunction Metabolic
            SubtractFunction MetabolicNconc
              VariableReference CritNconc: VariableName=[Stem].criticalNConc
              VariableReference MinNconc: VariableName=[Stem].minimumNconc
            VariableReference PotentialDMAllocation: VariableName=[Stem].potentialDMAllocation.Structural
          StorageNDemandFunction Storage
            VariableReference NitrogenDemandSwitch: VariableName=[Stem].nitrogenDemandSwitch
            VariableReference MaxNconc: VariableName=[Stem].maximumNconc
        RetranslocateNonStructural RetranslocateNitrogen
        BiomassDemand InitialWt
          Constant Structural: FixedValue=0; Units=g/m^2
          Constant Metabolic: FixedValue=0
          Constant Storage: FixedValue=0
        Constant Photosynthesis: FixedValue=0
        VariableReference initialNConcFunction: VariableName=[Stem].MinimumNConc
        BiomassDemand dmDemandPriorityFactors
          Constant Structural: FixedValue=1
          Constant Metabolic: FixedValue=1
          Constant Storage: FixedValue=1
      CompositeBiomass AboveGround: DMDOfStructural=0.6
        Propertys=[[Leaf].Live, [Leaf].Dead, [Stem].Live, [Stem].Dead, [Spike].Live, [Spike].Dead, [Grain].Live, [Grain].Dead]
      CompositeBiomass AboveGroundLive: Propertys=[[Leaf].Live, [Stem].Live, [Spike].Live, [Grain].Live]; DMDOfStructural=0.6
      CompositeBiomass AboveGroundDead: Propertys=[[Leaf].Dead, [Stem].Dead, [Spike].Dead, [Grain].Dead]; DMDOfStructural=0.6
      CompositeBiomass BelowGround: Propertys=[[Root].Live, [Root].Dead]; DMDOfStructural=0.6
      CompositeBiomass Total: DMDOfStructural=0.6
        Propertys=[[Leaf].Live, [Leaf].Dead, [Stem].Live, [Stem].Dead, [Root].Live, [Root].Dead, [Spike].Live, [Spike].Dead, [Grain].Live, [Grain].Dead]
      CompositeBiomass TotalLive: DMDOfStructural=0.6
        Propertys=[[Leaf].Live, [Stem].Live, [Root].Live, [Spike].Live, [Grain].Live]
      CompositeBiomass TotalDead: DMDOfStructural=0.6
        Propertys=[[Leaf].Dead, [Stem].Dead, [Root].Dead, [Spike].Dead, [Grain].Dead]
      CompositeBiomass Ear: Propertys=[[Spike].Live, [Grain].Live, [Spike].Dead, [Grain].Dead]; DMDOfStructural=0.6
        Memo
          The Ear composite biomass object includes the Live and dead pools of all organs within the Ear to allow output for total dry matter and Nutrient contents, including total structural, non-structural and metabolic pools.
      CompositeBiomass StemPlusSpike: Propertys=[[Stem].Live, [Spike].Live, [Stem].Dead, [Spike].Dead]; DMDOfStructural=0.6
      CultivarFolder Cultivars
        CultivarFolder NQ_variety
          Cultivar YRL39
            Command:
              [Phenology].MinimumLeafNumber.FixedValue = 7
              [Phenology].PpSensitivity.FixedValue = 2
              [Phenology].EarlyReproductivePpSensitivity.FixedValue = 2
              [Structure].BranchMortality.MortalityPhase.Mortality.MortalityPerDegDay.XYPairs.Y = 0.001,0
              [Leaf].ExtinctionCoeff.FixedValue  = 0.5
              [Leaf].CohortParameters.MaxArea.AreaLargestLeaves.FixedValue = 2000
              [Grain].NumberFunction.GrainNumber.GrainsPerGramOfStem.FixedValue = 25
          Cultivar Ando: Command=[Phenology].MinimumLeafNumber.FixedValue = 7
      Constant MortalityRate: FixedValue=0
  Simulation
    Clock: Start=2018-01-01; End=2018-12-31
    Summary SummaryFile
    Weather: FileName=C:\2020_Try_model\weather\2019_Brandon.met
    SoilArbitrator
    Zone Field: Area=1; Slope=0; AspectAngle=0; Altitude=50
      Report
        VariableNames:
          [Clock].Today
          [Rice].Phenology.Zadok.Stage
          [Rice].Phenology.CurrentStageName
          [Rice].AboveGround.Wt
          [Rice].AboveGround.N
          [Rice].Grain.Total.Wt*10 as Yield
          [Rice].Grain.Protein
          [Rice].Grain.Size
          [Rice].Grain.Number
          [Rice].Grain.Total.Wt
          [Rice].Grain.Total.N
          [Rice].Total.Wt
      Fertiliser
      Soil: ASCOrder=Vertosol; ASCSubOrder=Black; SoilType=Clay; Site=Norwin; NearestTown=Norwin; Region=Darling Downs and Granite Belt; State=Queensland; Country=Australia; NaturalVegetation=Qld. Bluegrass, possible Qld. Blue gum; ApsoilNumber=900; Latitude=-27.581836; Longitude=151.320206; LocationAccuracy=+/- 20m
        DataSource=CSIRO Sustainable Ecosystems, Toowoomba; Characteriesd as part of the GRDC funded project"Doing it better, doing it smarter, managing soil water in Australian agriculture' 2011
        Comments=OC, CLL for all crops estimated-based on Bongeen Mywybilla Soil No1
        Physical
          Thickness  BD       AirDry    LL15      DUL       SAT       KS
          150        1.01056  0.13025   0.2605    0.521     0.588655  20
          150        1.07146  0.198689  0.248362  0.496723  0.565677  20
          300        1.09394  0.28      0.28      0.488438  0.557193  20
          300        1.15861  0.28      0.28      0.480297  0.532787  20
          300        1.17301  0.28      0.28      0.471584  0.527354  20
          300        1.16287  0.28      0.28      0.457071  0.53118   20
          300        1.1875   0.28      0.28      0.452332  0.521888  20
          SoilCrop RiceSoil: LL=[0.261, 0.248, 0.28, 0.306, 0.36, 0.392, 0.446]; KL=[0.06, 0.06, 0.06, 0.04, 0.04, 0.02, 0.01]; XF=[1, 1, 1, 1, 1, 1, 1]
        WaterBalance SoilWater: SummerDate=1-Nov; SummerU=5; SummerCona=5; WinterDate=1-Apr; WinterU=5; WinterCona=5; DiffusConst=40; DiffusSlope=16; Salb=0.12; CN2Bare=73; CNRed=20; CNCov=0.8; Thickness=[150, 150, 300, 300, 300, 300, 300]; SWCON=[0.3, 0.3, 0.3, 0.3, 0.3, 0.3, 0.3]
        Organic: FOMCNRatio=40
          Thickness  Carbon  SoilCNRatio  FBiom  FInert  FOM
          150        1.2     12           0.04   0.4     347.129
          150        0.96    12           0.02   0.6     270.344
          300        0.6     12           0.02   0.8     163.972
          300        0.3     12           0.02   1       99.4541
          300        0.18    12           0.01   1       60.322
          300        0.12    12           0.01   1       36.5871
          300        0.12    12           0.01   1       22.1912
        Chemical
          Thickness  NO3N  NH4N  PH
          150        1     0.1   8
          150        1     0.1   8
          300        1     0.1   8
          300        1     0.1   8
          300        1     0.1   8
          300        1     0.1   8
          300        1     0.1   8
        InitialWater: PercentMethod=1; FractionFull=1
        Sample InitialN: Thickness=[150, 150, 300, 300, 300, 300, 300]; SWUnits=Volumetric; OCUnits=Total; PHUnits=Water
        CERESSoilTemperature Temperature
        Nutrient
      SurfaceOrganicMatter: InitialResidueName=rice_stubble; InitialResidueType=rice; InitialResidueMass=500; InitialStandingFraction=0; InitialCPR=0; InitialCNR=30
      MicroClimate: a_interception=0; b_interception=1; c_interception=0; d_interception=0; soil_albedo=0.3; SoilHeatFluxFraction=0.4; MinimumHeightDiffForNewLayer=0; NightInterceptionFraction=0.5; ReferenceHeight=2
      Manager SowingFertiliser
        Amount = 100
        CropName = Rice
```csharp
using Models.PMF;
using Models.Core;
using System;
namespace Models
{
    [Serializable]
    public class Script : Model
    {
        [Link] Clock Clock;
        [Link] Fertiliser Fertiliser;
        [Link] Summary Summary;
        
        
        [Description("Amount of fertiliser to be applied (kg/ha)")]
        public double Amount { get; set;}
        
        [Description("Crop to be fertilised")]
        public string CropName { get; set;}
        
        
        

        [EventSubscribe("Sowing")]
        private void OnSowing(object sender, EventArgs e)
        {
            Model crop = sender as Model;
            if (crop.Name.ToLower()==CropName.ToLower())
                Fertiliser.Apply(Amount: Amount, Type: Fertiliser.Types.NO3N);
        }
        
    }
}
```
      Manager Harvest
```csharp
using Models.Soils.Nutrients;
using System;
using Models.Core;
using Models.PMF;
using Models.Soils;
using Models.Soils.Nutrients;
using Models.Utilities;
using APSIM.Shared.Utilities;

namespace Models
{
    [Serializable]
    public class Script : Model
    {
        [Link(ByName = true)] Plant Rice;

        [EventSubscribe("DoManagement")]
        private void OnDoManagement(object sender, EventArgs e)
        {
            if (Rice.IsReadyForHarvesting)
            {
               Rice.Harvest();
               Rice.EndCrop();    
            }
        
        }
        
    }
}
```
      Manager Sow on a fixed date
        Crop = [Rice]
        SowDate = 24-Jul
        CultivarName = Ando
        SowingDepth = 15
        RowSpacing = 200
        Population = 25
```csharp
using Models.Soils.Nutrients;
using System;
using Models.Core;
using Models.PMF;
using Models.Soils;
using Models.Soils.Nutrients;
using Models.Utilities;
using APSIM.Shared.Utilities;

namespace Models
{
    [Serializable]
    public class Script : Model
    {
        [Link] Clock Clock;
        [Link] Fertiliser Fertiliser;
        [Link] Summary Summary;
        [Link] Soil Soil;
        Accumulator accumulatedRain;
        
        [Description("Crop")]
        public IPlant Crop { get; set; }
        [Description("Sowing date (d-mmm)")]
        public string SowDate { get; set; }
       [Display(Type = DisplayType.CultivarName, PlantName = "Rice")]
        [Description("Cultivar to be sown")]
        public string CultivarName { get; set; }
        [Description("Sowing depth (mm)")]
        public double SowingDepth { get; set; }
        [Description("Row spacing (mm)")]
        public double RowSpacing { get; set; }
        [Description("Plant population (/m2)")]
        public double Population { get; set; }
        


        [EventSubscribe("DoManagement")]
        private void OnDoManagement(object sender, EventArgs e)
        {
            if (DateUtilities.WithinDates(SowDate, Clock.Today, SowDate))
            {
                Crop.Sow(population: Population, cultivar: CultivarName, depth: SowingDepth, rowSpacing: RowSpacing);    
            }
        
        }
        
    }
}
```
      Plant Rice: ResourceName=Barley
  DataStore
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