Simulations: Version=67
  Simulation Wheat Maize Rotation
    Clock: Start=1900-01-01; End=1910-01-01
    Summary SummaryFile
    Weather: FileName=%root%\Examples\WeatherFiles\Dalby.met
    SoilArbitrator
    Zone Field: Area=1; Slope=0
      Report: EventNames=[Clock].EndOfDay
        VariableNames:
          [Clock].Today
          [Rotation].Script.currentState
          SowingRule1.Script.canLeave
          [Wheat].Phenology.Zadok.Stage
          [Wheat].Phenology.CurrentStageName
          [Wheat].IsAlive
          [Wheat].IsReadyForHarvesting
          [Wheat].AboveGround.Wt
          [Wheat].AboveGround.N
          [Wheat].Grain.Total.Wt*10 as WheatYield
          [Maize].Grain.Total.Wt*10 as MaizeYield
          [Wheat].Grain.Protein
          [Wheat].Grain.Size
          [Wheat].Grain.Number
          [Wheat].Grain.Total.Wt
          [Wheat].Grain.Total.N
          [Wheat].Total.Wt
          Sum([Soil].SoilWater.ESW) as ESW
          [Soil].SoilWater.Es as ESoil
      Fertiliser
      Soil: ASCOrder=Vertosol; ASCSubOrder=Black; SoilType=Clay; Site=Norwin; NearestTown=Norwin; Region=Darling Downs and Granite Belt; State=Queensland; Country=Australia; NaturalVegetation=Qld. Bluegrass, possible Qld. Blue gum; ApsoilNumber=900; Latitude=-27.581836; Longitude=151.320206; LocationAccuracy=+/- 20m
        DataSource=CSIRO Sustainable Ecosystems, Toowoomba; Characteriesd as part of the GRDC funded project"Doing it better, doing it smarter, managing soil water in Australian agriculture' 2011
        Comments=OC, CLL for all crops estimated-based on Bongeen Mywybilla Soil No1
        Physical
          Thickness  BD       AirDry    LL15      DUL       SAT       KS
          150        1.01056  0.13025   0.2605    0.521     0.588655  20
          150        1.07146  0.198689  0.248362  0.496723  0.565677  20
          300        1.09394  0.28      0.28      0.488438  0.557193  20
          300        1.15861  0.28      0.28      0.480297  0.532787  20
          300        1.17301  0.28      0.28      0.471584  0.527354  20
          300        1.16287  0.28      0.28      0.457071  0.53118   20
          300        1.1875   0.28      0.28      0.452332  0.521888  20
          SoilCrop WheatSoil: LL=[0.261, 0.248, 0.28, 0.306, 0.36, 0.392, 0.446]; KL=[0.06, 0.06, 0.06, 0.04, 0.04, 0.02, 0.01]; XF=[1, 1, 1, 1, 1, 1, 1]
          SoilCrop MaizeSoil: LL=[0.261, 0.248, 0.28, 0.306, 0.36, 0.392, 0.446]; KL=[0.06, 0.06, 0.06, 0.04, 0.04, 0.02, 0.01]; XF=[1, 1, 1, 1, 1, 1, 1]
        SoilWater: SummerDate=1-Nov; SummerU=5; SummerCona=5; WinterDate=1-Apr; WinterU=5; WinterCona=5; DiffusConst=40; DiffusSlope=16; Salb=0.12; CN2Bare=73; CNRed=20; CNCov=0.8; max_pond=0; Thickness=[150, 150, 300, 300, 300, 300, 300]; SWCON=[0.3, 0.3, 0.3, 0.3, 0.3, 0.3, 0.3]
        SoilNitrogen: fom_types=[default, manure, mucuna, lablab, shemp, stable]; fract_carb=[0.2, 0.3, 0.54, 0.57, 0.45, 0]; fract_cell=[0.7, 0.3, 0.37, 0.37, 0.47, 0.1]; fract_lign=[0.1, 0.4, 0.09, 0.06, 0.08, 0.9]
          SoilNitrogenNO3 NO3
          SoilNitrogenNH4 NH4
          SoilNitrogenUrea Urea
          SoilNitrogenPlantAvailableNO3 PlantAvailableNO3
          SoilNitrogenPlantAvailableNH4 PlantAvailableNH4
        Organic: FOMCNRatio=40
          Thickness  Carbon  SoilCNRatio  FBiom  FInert  FOM
          150        1.2     12           0.04   0.4     347.129
          150        0.96    12           0.02   0.6     270.344
          300        0.6     12           0.02   0.8     163.972
          300        0.3     12           0.02   1       99.4541
          300        0.18    12           0.01   1       60.322
          300        0.12    12           0.01   1       36.5871
          300        0.12    12           0.01   1       22.1912
        Chemical
          Thickness  NO3N  NH4N  PH
          150        1     0.1   8
          150        1     0.1   8
          300        1     0.1   8
          300        1     0.1   8
          300        1     0.1   8
          300        1     0.1   8
          300        1     0.1   8
        InitialWater: PercentMethod=1; FractionFull=1
        Sample InitialN: Thickness=[150, 150, 300, 300, 300, 300, 300]; SWUnits=Volumetric; OCUnits=Total; PHUnits=Water
        CERESSoilTemperature
      SurfaceOrganicMatter: InitialResidueName=wheat_stubble; InitialResidueType=wheat; InitialResidueMass=500; InitialStandingFraction=0; InitialCPR=0; InitialCNR=100; FractionFaecesAdded=0.5
      Plant Wheat: CropType=Wheat; IsEnding=false; DaysAfterEnding=0
      Plant Maize: CropType=Maize; IsEnding=false; DaysAfterEnding=0
      MicroClimate: a_interception=0; b_interception=1; c_interception=0; d_interception=0; soil_albedo=0.3; SoilHeatFluxFraction=0.4; NightInterceptionFraction=0.5; ReferenceHeight=2
      Manager SowingFertiliser
        Amount = 160
        CropName = wheat
```csharp
using System;
using Models.Core;
using Models.PMF;
namespace Models
{
    [Serializable]
    public class Script : Model
    {
        [Link] Clock Clock;
        [Link] Fertiliser Fertiliser;
        [Link] Summary Summary;
        
        
        [Description("Amount of fertiliser to be applied (kg/ha)")]
        public double Amount { get; set;}
        
        [Description("Crop to be fertilised")]
        public string CropName { get; set;}
        
        
        

        [EventSubscribe("Sowing")]
        private void OnSowing(object sender, EventArgs e)
        {
            Model crop = sender as Model;
            if (crop.Name.ToLower()==CropName.ToLower())
                Fertiliser.Apply(Amount: Amount, Type: Fertiliser.Types.NO3N);
        }
        
    }
}
```
      Manager Rotation
        currentState =
```csharp
using System;
using System.Text;
using System.Collections.Generic;

using Models.Core;
using Models.Utilities;
using APSIM.Shared.Utilities;

namespace Models
{
	[Serializable]
	public class Script : Model
	{
		[Link] Simulation MySimulation;
		[Link] Summary Summary;

		[Units("")]//[Description("Current State of DG")] 
        public string currentState
		{
			get { return (_currentState); }
			set { }
		}

		private DirectedGraph g;

		private string _currentState = "";

		private void setState(string s)
		{
			_currentState = s;
		}
		private string getState()
		{
			return (_currentState);
		}

		[EventSubscribe("Commencing")]
		private void OnCommence(object sender, EventArgs e)
		{
			g = new DirectedGraph();
			int i = 0;
			// Autogenerated from chart vvvvvvvvvv
			//##PART 1 ##
			string[] states = new string[4];
			g.AddNode("Wheat");
			states[i++] = "Wheat";
			g.AddNode("fallow0");
			states[i++] = "fallow0";
			g.AddNode("Maize");
			states[i++] = "Maize";
			g.AddNode("fallow1");
			states[i++] = "fallow1";

			ruleAction arc0a = new ruleAction();
			arc0a.testCondition.Add("[SowingRule1].Script.canLeave");
			arc0a.action.Add("[SowingRule1].Script.Leave");
			g.AddDirectedEdge("Wheat", "fallow0", arc0a);
			ruleAction arc0b = new ruleAction();
			arc0b.testCondition.Add("[SowingRule2].Script.canEnter");
			arc0b.action.Add("[SowingRule2].Script.Enter");
			g.AddDirectedEdge("fallow0", "Maize", arc0b);
			ruleAction arc1a = new ruleAction();
			arc1a.testCondition.Add("[SowingRule2].Script.canLeave");
			arc1a.action.Add("[SowingRule2].Script.Leave");
			g.AddDirectedEdge("Maize", "fallow1", arc1a);
			ruleAction arc1b = new ruleAction();
			arc1b.testCondition.Add("[SowingRule1].Script.canEnter");
			arc1b.action.Add("[SowingRule1].Script.Enter");
			g.AddDirectedEdge("fallow1", "Wheat", arc1b);

			//##PART 2##
			setState("fallow0");
			// Autogenerated from chart ^^^^^^^^^^^^^



		    (MySimulation.GetEventService(this) as Events).Publish("transition", null);
			Summary.WriteMessage(this, "Initialised, n states=" + states.Length);
		}

		[EventSubscribe("DoManagement")]
		private void OnProcess(object sender, EventArgs e)
		{
			bool more = true;
			while (more)
			{
				more = false;
				double bestScore = -1.0;
				string bestArc = "";
				string bestPaddock = "";
				Node s = g.FindNode(getState());
				//Summary.WriteMessage(this, "process 0 state=" + s.Name);
				foreach (string _arc in s.arcs.Keys)
				{
					double score = 1;
					foreach (string testCondition in s.arcs[_arc].testCondition)
					{
						var v = MySimulation.Get(testCondition);
  						if (v == null) throw new Exception("Test condition \"" + testCondition + "\" returned nothing");
						//Summary.WriteMessage(this, "process 1 test=" + testCondition + " value=" + v);
						double c = System.Convert.ToDouble(v);
						score *= c;
					}
					if (score > bestScore)
					{
						bestScore = score;
						bestArc = _arc;
					}
				}
				if (bestScore > 0.0)
				{
				    Events eventService = (Events) MySimulation.GetEventService(this);

					s = g.FindNode(getState());
					if (getState() != "") {
                        eventService.Publish("transition_from_" + getState(), null);
                        eventService.Publish("transition", null);
                        setState(g.FindArcTarget(bestArc));
                    }
					foreach (string action in s.arcs[bestArc].action)
					{
						//Summary.WriteMessage(this, " action=" + action);
                        eventService.Publish(action, null /*new object[] { null, new EventArgs() }*/);
					}
					eventService.Publish("transition_to_" + getState(), null);
					more = true;
				}
			}
		}
		private class ruleAction
		{
			public string Target;
			public List<string> testCondition = new List<string>();
			public List<string> action = new List<string>();
		}
		private class Node : IEquatable<Node>
		{
			private string data /*, alias*/;
			public Node(string _data)
			{
				data = _data;
			}
			public Dictionary<string, ruleAction> arcs = new Dictionary<string, ruleAction>();
			public bool Equals(Node other)
			{
				return (this.data == other.data);
			}
			public string Name { get { return (data); } }
		}
		[Serializable]
		private class DirectedGraph
		{

			public List<Node> vertices;
			public void print()
			{
				foreach (Node n in vertices)
				{
					Console.WriteLine(n.Name + ":");
					foreach (string k in n.arcs.Keys)
					{
						Console.WriteLine("  " + k);
					}
				}
			}
			public DirectedGraph()
			{
				vertices = new List<Node>();
			}
			public Node AddNode(Node node)
			{
				if (vertices.Find(delegate (Node n)
					{
						return (n.Equals(node));
					}) == null)
					vertices.Add(node);
				return (vertices.Find(delegate (Node n)
					{
						return (n.Equals(node));
					}));
			}
			public Node AddNode(string value)
			{
				return (AddNode(new Node(value)));
			}
			public Node FindNode(string value)
			{
				return (FindNode(AddNode(value)));
			}
			public Node FindNode(Node node)
			{
				return (vertices.Find(delegate (Node n)
					{
						return (n.Equals(node));
					}));
			}
			public void AddDirectedEdge(string source, string dest, ruleAction value)
			{
				int i = 0;
				foreach (Node n in vertices)
				{
					foreach (string arc in n.arcs.Keys)
					{
						i++;
					}
				}
				Node node1 = AddNode(source);
				AddNode(dest);
				value.Target = dest;
				node1.arcs.Add("arc" + i.ToString(), value);
			}
			public string FindArcTarget(string arc)
			{
				foreach (Node n in vertices)
				{
					foreach (string a in n.arcs.Keys)
					{
						if (a == arc)
						{
							return (n.arcs[a].Target);
						}
					}
				}
				Console.WriteLine("Aiee - no target for arc " + arc);
				return ("");
			}
		}
	}
}
```
      Manager SowingRule1
        Crop = [Wheat]
        StartDate = 1-may
        EndDate = 10-jul
        MinESW = 100
        MinRain = 25
        RainDays = 7
        MustSow = yes
        CultivarName = Hartog
        SowingDepth = 30
        RowSpacing = 250
        Population = 120
        canEnter = 0
        canLeave = 0
```csharp
using System;
using Models.Core;
using Models.PMF;
using Models.Soils;
using Models.Utilities;
using APSIM.Shared.Utilities;

namespace Models
{
    [Serializable]
    public class Script : Model
    {
        //[Link] Simulation Simulation;
        [Link] Clock Clock;
        [Link] Summary Summary;
        [Link] Soil Soil; 

        [Description("Crop to manage")]
        public IPlant Crop { get; set; }
        [Separator("")]
        [Description("Start of sowing window (d-mmm)")]
        public string StartDate { get; set;}
        [Description("End of sowing window (d-mmm)")]
        public string EndDate { get; set;}
        [Description("Minimum extractable soil water for sowing (mm)")]
        public double MinESW { get; set;}
        [Description("Accumulated rainfall required for sowing (mm)")]
        public double MinRain { get; set;}
        [Description("Duration of rainfall accumulation (d)")]
        public int RainDays { get; set;}

        public enum yesNoType
        {
            /// <summary>a positive answer</summary>
            yes,
            /// <summary>a negative answer</summary>
            no
        }

        [Description("Must sow (yes/no)")]
        public yesNoType MustSow { get; set;}
        [Separator("")]
        [Description("Cultivar to be sown")]
        [Display(Type=DisplayType.CultivarName)]
        public string CultivarName { get; set;}
        [Description("Sowing depth (mm)")]
        public double SowingDepth { get; set;}        
        [Description("Row spacing (mm)")]
        public double RowSpacing { get; set;}    
        [Description("Plant population (/m2)")]
        public double Population { get; set;}    

        private Accumulator accumulatedRain;
        private bool afterInit = false;
                
        [EventSubscribe("Commencing")]
        private void OnSimulationCommencing(object sender, EventArgs e)
        {
            if (Crop == null) { throw new Exception("Crop must not be null in rotations"); }
            accumulatedRain = new Accumulator(this, "[Weather].Rain", RainDays);
            afterInit = true;
            Summary.WriteMessage(this, Apsim.FullPath(this) + " - Commence, crop=" + (Crop as Model).Name);
        }
        
        [EventSubscribe("DoManagement")]
        private void DoManagement(object sender, EventArgs e)
        {
            accumulatedRain.Update();
            //FIXME test if sequencer...
            //if (canEnter > 0)
            //    OnEnter();

            //if (canLeave > 0)
            //    OnLeave();
        }

   // Test whether we can sow a crop today
   // +ve number - yes
   // 0          - no
   // -ve number - no, out of scope (planting window)
   [Units("0-1")]
   public int canEnter  {
      get {
         if (!afterInit) {return (0);}
         bool isPossibleToday = false;
         bool inWindow = DateUtilities.WithinDates(StartDate, Clock.Today, EndDate);
         bool endOfWindow = DateUtilities.DatesEqual(EndDate, Clock.Today);
         if (! Crop.IsAlive &&
             inWindow &&
             accumulatedRain.Sum > MinRain &&
             MathUtilities.Sum(Soil.SoilWater.ESW) > MinESW) 
            isPossibleToday = true;

         //Summary.WriteMessage(this, "canEnter:" + isPossibleToday);

	     if (isPossibleToday)
            return 1;
         
         if (! Crop.IsAlive && endOfWindow && MustSow == yesNoType.yes) 
            return 1;

         if (! Crop.IsAlive && ! inWindow)
            return -1;
         return 0;
      }
      set {}
   }

   [EventSubscribe("Enter")]
   private void OnEnter ()  {
      Summary.WriteMessage(this, Apsim.FullPath(this) + " -  sowing " + (Crop as Model).Name);
      Crop.Sow(population:Population, cultivar:CultivarName, depth:SowingDepth, rowSpacing:RowSpacing);    
   }

   [Units("0-1")] 
   public int canLeave  {
      get {
        if (!afterInit) { return (0); }
        //Summary.WriteMessage(this, "canLeave:" + Crop.IsReadyForHarvesting);
        return(Crop.IsReadyForHarvesting ? 1 : 0);
      }
      set{}
   } 

   [EventSubscribe("Leave")]
   private void OnLeave ()  {
      Crop.Harvest();
      Crop.EndCrop();    
   }
  }
}
```
      Manager SowingRule2
        Crop = [Maize]
        StartDate = 10-oct
        EndDate = 10-nov
        MinESW = 100
        MinRain = 25
        RainDays = 7
        MustSow = yes
        CultivarName = Katumani
        SowingDepth = 30
        RowSpacing = 500
        Population = 4
        canEnter = 0
        canLeave = 0
```csharp
using System;
using Models.Core;
using Models.PMF;
using Models.Soils;
using Models.Utilities;
using APSIM.Shared.Utilities;

namespace Models
{
    [Serializable]
    public class Script : Model
    {
        //[Link] Simulation Simulation;
        [Link] Clock Clock;
        [Link] Summary Summary;
        [Link] Soil Soil; 

        [Description("Crop to manage")]
        public IPlant Crop { get; set; }
        [Separator("")]
        [Description("Start of sowing window (d-mmm)")]
        public string StartDate { get; set;}
        [Description("End of sowing window (d-mmm)")]
        public string EndDate { get; set;}
        [Description("Minimum extractable soil water for sowing (mm)")]
        public double MinESW { get; set;}
        [Description("Accumulated rainfall required for sowing (mm)")]
        public double MinRain { get; set;}
        [Description("Duration of rainfall accumulation (d)")]
        public int RainDays { get; set;}

        public enum yesNoType
        {
            /// <summary>a positive answer</summary>
            yes,
            /// <summary>a negative answer</summary>
            no
        }

        [Description("Must sow (yes/no)")]
        public yesNoType MustSow { get; set;}
        [Separator("")]
        [Description("Cultivar to be sown")]
        [Display(Type=DisplayType.CultivarName)]
        public string CultivarName { get; set;}
        [Description("Sowing depth (mm)")]
        public double SowingDepth { get; set;}        
        [Description("Row spacing (mm)")]
        public double RowSpacing { get; set;}    
        [Description("Plant population (/m2)")]
        public double Population { get; set;}    

        private Accumulator accumulatedRain;
                
        [EventSubscribe("Commencing")]
        private void OnSimulationCommencing(object sender, EventArgs e)
        {
        if (Crop == null) { throw new Exception("Crop must not be null in rotations"); }
            accumulatedRain = new Accumulator(this, "[Weather].Rain", RainDays);
            Summary.WriteMessage(this, Apsim.FullPath(this) + " - Commence, crop=" + (Crop as Model).Name);
        }
        
        [EventSubscribe("DoManagement")]
        private void DoManagement(object sender, EventArgs e)
        {
            accumulatedRain.Update();
            //FIXME test if sequencer...
            //if (canEnter > 0)
            //    OnEnter();

            //if (canLeave > 0)
            //    OnLeave();
        }

   // Test whether we can sow a crop today
   // +ve number - yes
   // 0          - no
   // -ve number - no, out of scope (planting window)
   [Units("0-1")]
   public int canEnter  {
      get {
         try {
         bool isPossibleToday = false;
         bool inWindow = DateUtilities.WithinDates(StartDate, Clock.Today, EndDate);
         bool endOfWindow = DateUtilities.DatesEqual(EndDate, Clock.Today);
         if (! Crop.IsAlive &&
             inWindow &&
             accumulatedRain.Sum > MinRain &&
             MathUtilities.Sum(Soil.SoilWater.ESW) > MinESW) 
            isPossibleToday = true;

         //Summary.WriteMessage(this, "canEnter:" + isPossibleToday);

	     if (isPossibleToday)
            return 1;
         
         if (! Crop.IsAlive && endOfWindow && MustSow == yesNoType.yes) 
            return 1;

         if (! Crop.IsAlive && ! inWindow)
            return -1;
            } catch (Exception e) {};
         return 0;
      }
      set {}
   }

   [EventSubscribe("Enter")]
   private void OnEnter ()  {
      Summary.WriteMessage(this, Apsim.FullPath(this) + " -  sowing " + (Crop as Model).Name);
      Crop.Sow(population:Population, cultivar:CultivarName, depth:SowingDepth, rowSpacing:RowSpacing);    
   }

   [Units("0-1")] 
   public int canLeave  {
      get {
        try {
          //Summary.WriteMessage(this, "canLeave:" + Crop.IsReadyForHarvesting);
          return(Crop.IsReadyForHarvesting ? 1 : 0);
        } catch (Exception e) {};
        return(0);
      }
      set{}
   } 

   [EventSubscribe("Leave")]
   private void OnLeave ()  {
      Crop.Harvest();
      Crop.EndCrop();    
   }
  }
}
```
  DataStore
  Simulation Wheat Maize Rotation1
    Clock: Start=1900-01-01; End=1910-01-01
    Summary SummaryFile
    Weather: FileName=%root%\Examples\WeatherFiles\Dalby.met
    SoilArbitrator
    Zone Field: Area=1; Slope=0
      Report: EventNames=[Clock].EndOfDay
        VariableNames:
          [Clock].Today
          [RotBubbleChart].currentState
          [SowingRule1].Script.canLeave
          [Wheat].Phenology.Zadok.Stage
          [Wheat].Phenology.CurrentStageName
          [Wheat].IsAlive
          [Wheat].IsReadyForHarvesting
          [Wheat].AboveGround.Wt
          [Wheat].AboveGround.N
          [Wheat].Grain.Total.Wt*10 as WheatYield
          [Maize].Grain.Total.Wt*10 as MaizeYield
          [Wheat].Grain.Protein
          [Wheat].Grain.Size
          [Wheat].Grain.Number
          [Wheat].Grain.Total.Wt
          [Wheat].Grain.Total.N
          [Wheat].Total.Wt
          Sum([Soil].SoilWater.ESW) as ESW
          [Soil].SoilWater.Es as ESoil
      Fertiliser
      Soil: same as Wheat Maize Rotation.Field.Soil
      SurfaceOrganicMatter: InitialResidueName=wheat_stubble; InitialResidueType=wheat; InitialResidueMass=500; InitialStandingFraction=0; InitialCPR=0; InitialCNR=100; FractionFaecesAdded=0.5
      Plant Wheat: CropType=Wheat; IsEnding=false; DaysAfterEnding=0
      Plant Maize: CropType=Maize; IsEnding=false; DaysAfterEnding=0
      MicroClimate: a_interception=0; b_interception=1; c_interception=0; d_interception=0; soil_albedo=0.3; SoilHeatFluxFraction=0.4; NightInterceptionFraction=0.5; ReferenceHeight=2
      Manager SowingFertiliser: same as Wheat Maize Rotation.Field.SowingFertiliser
      RotBubbleChart: InitialState=Node 4
        Nodes:
          NodeName  Name    OutlineColour
          red       Node 1  0, 0, 0
          purple    Node 2  0, 0, 0
          Node 3    Node 3  0, 0, 0
          Node 4    Node 4  0, 0, 0
          [//[SowingRule2].Script.Leave, [SowingRule2].Script.DoLeave("Blarg");]
          [[SowingRule1].Script.Enter]
          [//[SowingRule1].Script.DoLeave("Blarg");, [SowingRule1].Script.Leave]
          [[SowingRule2].Script.Enter]
      Manager SowingRule1
        Crop = [Wheat]
        StartDate = 1-may
        EndDate = 10-jul
        MinESW = 100
        MinRain = 25
        RainDays = 7
        MustSow = yes
        CultivarName = Hartog
        SowingDepth = 30
        RowSpacing = 250
        Population = 120
        canEnter = 0
        canLeave = 0
```csharp
using System;
using Models.Core;
using Models.PMF;
using Models.Soils;
using Models.Utilities;
using APSIM.Shared.Utilities;

namespace Models
{
    [Serializable]
    public class Script : Model
    {
        //[Link] Simulation Simulation;
        [Link] Clock Clock;
        [Link] Summary Summary;
        [Link] Soil Soil; 

        [Description("Crop to manage")]
        public IPlant Crop { get; set; }
        [Separator("")]
        [Description("Start of sowing window (d-mmm)")]
        public string StartDate { get; set;}
        [Description("End of sowing window (d-mmm)")]
        public string EndDate { get; set;}
        [Description("Minimum extractable soil water for sowing (mm)")]
        public double MinESW { get; set;}
        [Description("Accumulated rainfall required for sowing (mm)")]
        public double MinRain { get; set;}
        [Description("Duration of rainfall accumulation (d)")]
        public int RainDays { get; set;}

        public enum yesNoType
        {
            /// <summary>a positive answer</summary>
            yes,
            /// <summary>a negative answer</summary>
            no
        }

        [Description("Must sow (yes/no)")]
        public yesNoType MustSow { get; set;}
        [Separator("")]
        [Description("Cultivar to be sown")]
        [Display(Type=DisplayType.CultivarName)]
        public string CultivarName { get; set;}
        [Description("Sowing depth (mm)")]
        public double SowingDepth { get; set;}        
        [Description("Row spacing (mm)")]
        public double RowSpacing { get; set;}    
        [Description("Plant population (/m2)")]
        public double Population { get; set;}    

        private Accumulator accumulatedRain;
        private bool afterInit = false;
                
        [EventSubscribe("Commencing")]
        private void OnSimulationCommencing(object sender, EventArgs e)
        {
            if (Crop == null) { throw new Exception("Crop must not be null in rotations"); }
            accumulatedRain = new Accumulator(this, "[Weather].Rain", RainDays);
            afterInit = true;
            Summary.WriteMessage(this, Apsim.FullPath(this) + " - Commence, crop=" + (Crop as Model).Name);
        }
        
        [EventSubscribe("DoManagement")]
        private void DoManagement(object sender, EventArgs e)
        {
            accumulatedRain.Update();
            //FIXME test if sequencer...
            //if (canEnter > 0)
            //    OnEnter();

            //if (canLeave > 0)
            //    OnLeave();
        }

   // Test whether we can sow a crop today
   // +ve number - yes
   // 0          - no
   // -ve number - no, out of scope (planting window)
   [Units("0-1")]
   public int canEnter  {
      get {
         if (!afterInit) {return (0);}
         bool isPossibleToday = false;
         bool inWindow = DateUtilities.WithinDates(StartDate, Clock.Today, EndDate);
         bool endOfWindow = DateUtilities.DatesEqual(EndDate, Clock.Today);
         if (! Crop.IsAlive &&
             inWindow &&
             accumulatedRain.Sum > MinRain &&
             MathUtilities.Sum(Soil.SoilWater.ESW) > MinESW) 
            isPossibleToday = true;

         //Summary.WriteMessage(this, "canEnter:" + isPossibleToday);

	     if (isPossibleToday)
            return 1;
         
         if (! Crop.IsAlive && endOfWindow && MustSow == yesNoType.yes) 
            return 1;

         if (! Crop.IsAlive && ! inWindow)
            return -1;
         return 0;
      }
      set {}
   }

   [EventSubscribe("Enter")]
   private void OnEnter ()  {
      Summary.WriteMessage(this, Apsim.FullPath(this) + " -  sowing " + (Crop as Model).Name);
      Crop.Sow(population:Population, cultivar:CultivarName, depth:SowingDepth, rowSpacing:RowSpacing);    
   }

   [Units("0-1")] 
   public int canLeave  {
      get {
        if (!afterInit) { return (0); }
        //Summary.WriteMessage(this, "canLeave:" + Crop.IsReadyForHarvesting);
        return(Crop.IsReadyForHarvesting ? 1 : 0);
      }
      set{}
   } 

   [EventSubscribe("Leave")]
   private void OnLeave ()  {
      Crop.Harvest();
      Crop.EndCrop();    
   }
   public void DoLeave (string msg)  {
      Summary.WriteMessage(this, "Leaving:" + msg);
      OnLeave();
   }
  }
}
```
      Manager SowingRule2
        Crop = [Maize]
        StartDate = 10-oct
        EndDate = 10-nov
        MinESW = 100
        MinRain = 25
        RainDays = 7
        MustSow = yes
        CultivarName = Katumani
        SowingDepth = 30
        RowSpacing = 500
        Population = 4
        canEnter = 0
        canLeave = 0
```csharp
using System;
using Models.Core;
using Models.PMF;
using Models.Soils;
using Models.Utilities;
using APSIM.Shared.Utilities;

namespace Models
{
    [Serializable]
    public class Script : Model
    {
        //[Link] Simulation Simulation;
        [Link] Clock Clock;
        [Link] Summary Summary;
        [Link] Soil Soil; 

        [Description("Crop to manage")]
        public IPlant Crop { get; set; }
        [Separator("")]
        [Description("Start of sowing window (d-mmm)")]
        public string StartDate { get; set;}
        [Description("End of sowing window (d-mmm)")]
        public string EndDate { get; set;}
        [Description("Minimum extractable soil water for sowing (mm)")]
        public double MinESW { get; set;}
        [Description("Accumulated rainfall required for sowing (mm)")]
        public double MinRain { get; set;}
        [Description("Duration of rainfall accumulation (d)")]
        public int RainDays { get; set;}

        public enum yesNoType
        {
            /// <summary>a positive answer</summary>
            yes,
            /// <summary>a negative answer</summary>
            no
        }

        [Description("Must sow (yes/no)")]
        public yesNoType MustSow { get; set;}
        [Separator("")]
        [Description("Cultivar to be sown")]
        [Display(Type=DisplayType.CultivarName)]
        public string CultivarName { get; set;}
        [Description("Sowing depth (mm)")]
        public double SowingDepth { get; set;}        
        [Description("Row spacing (mm)")]
        public double RowSpacing { get; set;}    
        [Description("Plant population (/m2)")]
        public double Population { get; set;}    

        private Accumulator accumulatedRain;
        private bool afterInit = false;
                
        [EventSubscribe("Commencing")]
        private void OnSimulationCommencing(object sender, EventArgs e)
        {
        if (Crop == null) { throw new Exception("Crop must not be null in rotations"); }
            accumulatedRain = new Accumulator(this, "[Weather].Rain", RainDays);
            Summary.WriteMessage(this, Apsim.FullPath(this) + " - Commence, crop=" + (Crop as Model).Name);
            afterInit = true;
        }
        
        [EventSubscribe("DoManagement")]
        private void DoManagement(object sender, EventArgs e)
        {
            accumulatedRain.Update();
            //FIXME test if sequencer...
            //if (canEnter > 0)
            //    OnEnter();

            //if (canLeave > 0)
            //    OnLeave();
        }

   // Test whether we can sow a crop today
   // +ve number - yes
   // 0          - no
   // -ve number - no, out of scope (planting window)
   [Units("0-1")]
   public int canEnter  {
      get {
         if (!afterInit) { return (0); }
         bool isPossibleToday = false;
         bool inWindow = DateUtilities.WithinDates(StartDate, Clock.Today, EndDate);
         bool endOfWindow = DateUtilities.DatesEqual(EndDate, Clock.Today);
         if (! Crop.IsAlive &&
             inWindow &&
             accumulatedRain.Sum > MinRain &&
             MathUtilities.Sum(Soil.SoilWater.ESW) > MinESW) 
            isPossibleToday = true;

         //Summary.WriteMessage(this, "canEnter:" + isPossibleToday);

	     if (isPossibleToday)
            return 1;
         
         if (! Crop.IsAlive && endOfWindow && MustSow == yesNoType.yes) 
            return 1;

         if (! Crop.IsAlive && ! inWindow)
            return -1;
         return 0;
      }
      set {}
   }

   [EventSubscribe("Enter")]
   private void OnEnter ()  {
      Summary.WriteMessage(this, Apsim.FullPath(this) + " -  sowing " + (Crop as Model).Name);
      Crop.Sow(population:Population, cultivar:CultivarName, depth:SowingDepth, rowSpacing:RowSpacing);    
   }

   [Units("0-1")] 
   public int canLeave  {
      get {
        if (!afterInit) { return (0); }
        //Summary.WriteMessage(this, "canLeave:" + Crop.IsReadyForHarvesting);
        return(Crop.IsReadyForHarvesting ? 1 : 0);
      }
      set{}
   } 

   [EventSubscribe("Leave")]
   private void OnLeave ()  {
      Crop.Harvest();
      Crop.EndCrop();    
   }

   public void DoLeave (string msg)  {
      Summary.WriteMessage(this, "Leaving:" + msg);
      OnLeave();
   }
  }
}
```
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