Simulations: Version=210
  DataStore
    ExcelInput: SheetNames=[Observed]
      FileNames=[MutdapillyObserved9194.xlsx, Mutdapilly9294.xlsx, Kyabram9597.xlsx, KairiObserved9194.xlsx, Gatton9597.xlsx, CasinoObserved9194.xlsx, RainShelter.xlsx, Observed.xlsx, ThinzarObserved.xlsx]
    PredictedObserved: PredictedTableName=Report; ObservedTableName=Observed; FieldNameUsedForMatch=SimulationName; FieldName2UsedForMatch=Clock.Today; AllColumns=false
  Memo
    AgPasture is a model developed to simulate pasture growth in the APSIM framework. It was initially based on the plant physiological model of [#thornley1990plant], as were the models SGS/DairyMod/EcoMod, presented by [#johnson_dairymod_2008]. Today in AgPasture, the plant processes were adapted from EcoMod but all environmental factors and partition of resources is done by other models in the APSIM framework.The main purpose of AgPasture is to simulate mixed pastures but based on individual calculations for each species of photosynthesis, respiration, dry matter accumulation and partitioning and tissue turnover as presented by [#li_modelling_2011]. It simulates pastures composed by C3 and C4 grasses, legumes and forbs. Now AgPasture has the sward component that is responsible for integrating the outputs obtained for each species and controlling management aspects, such as grazing.
    The base species in AgPasture is a generic temperate C3 grass parameterised as a generic ryegrass. All simulations are based on an stablished pasture, so there is no development from seeds. The proportion of species in the sward varies according to environmental effects, water and nutrient extraction ability and effects of harvests (cutting or grazing) on each of the species in the sward. Each species is described as a set of organs (Figure 1) and these organs are described by tissue pools (Figure 2).

    ![Description of plant species in AgPasture with the indication of a general class for plant parts.](AgPasturePlantSpecies.png)

    ![Tissue dynamics in AgPasture, from new growth until senescence.](AgPastureTissueDynamics.png)

    The water demand is calculated by the MicroClimate model (originally micromet; [#snow_apsimmicromet_2004]). Water availability is then calculated according to the root distribution and the KL parameter in the soil. The communication wih the soil is mediated by SoilArbitrator, which is lso responsible to balance resource competition between plants. Similarly, SoilArbitrator mediates nitrogen availability. AgPasture receives this information and calculates plant potential growth through net photosynthesis and a series of growth limiting factors (GLF), related to water, nitrogen, temperature, fertility (to account for nutrient limitations, other than nitrogen) and a generic factor (to account for the effects of diseases, for example) are used to reach the actual plant growth. This actual plant growth is what is used for the further processes of tissue turnover and dry matter allocation presented in Figure 3. Dry matter transfer across tissues, how turnover rates act, and nitrogen balance are presented in Figure 4. In general, AgPasture calculates the turnover rates (γ) for each tissue pool of all plant organs. The rates are then passed on to each organ and the amounts to be potentially turned over (dDM) are calculated for each tissue pool. For nitrogen, basically AgPasture uses the nitrogen taken up from the soil and fixed by legumes. This nitrogen amount will then be available for new growth. The process of nitrogen uptake aims for the maximum concentration of nitrogen in new growth (Nmax*). This is not always achieved and the current nitrogen concentration will be added to the pool of tissue 0, which actively contributes with dry matter and nitrogen transfer for older tissues. The same happens for tissues 1 and 2. One of the modifications done in AgPasture for APSIMX is the definition of an adequate nitrogen concentration in these pools. Now tissues have a target concentration of nitrogen  and any extra nitrogen is put through the remobilisable nitrogen pool ([#vogeler2016deriving]). The rate of nitrogen remobilisation is defined by kL, which mainly shows that the priority is the first leaf. When the first leaf becomes deficient, the remobilisation of extra nitrogen aims to fulfill the nitrogen need for this pool. At the same time, a minimum concentration of nitrogen is always transferred to the pool of tissue 3, resulting in a constant nitrogen concentration of this pool. This is then added to the litter pool. where dry matter that comes from the shoot is added to the surface organic matter pool whereas dry matter from roots goes to the soil fresh organic matter pool. The amount of nitrogen remobilisable that was not used is then added to the litter pool.

    ![Description of growth calculations done by AgPasture, from photosynthesis up to the partitioning of growth between shoot and root.](AgPastureGrowth.png)

    ![Nitrogen balance and dry matter transfer in AgPasture.](AgPastureBalance.png)

    AgPasture does not account for phenological development, therefore it does not simulate reproductive growth and seed production. Instead, the model mimics changes in growth rate and dry matter allocation by using a simple function (based on latitude and some species specific parameters) that changes in the shoot:root ratio of plants during this "reproductive period". Another limitation of the model is the lack of carbon remobilisation, which makes it difficult to simulate the proper remobilisation of reserves in the plant. More details are given in the supplementary documentation for AgPasture.
    Biomass removal can be simulated by the Graze (Figure 5) and RemoveBiomass (Figure 6) methods. The Graze method is a simple way to present the amount of biomass to be removed. It uses a parameter 'Amount', which sets up the amount of dry matter to be removed, and a parameter 'Type', which defines how the value of 'Amount' is interpreted. 'Type' can be set as 'ResidueAmount', where the target amount of dry matter is a value for the residual amount of biomass that will be left after harvest, or it can be set as 'RemoveAMount', where the target amount of dry matter is the value to be removed by the harvest. Both methods are dependent on a minimum above ground green dry matter that is set as a default of 100 kg DM/ha and can never be removed. Then a function 'RemoveDM' is responsible for the dry matter removal and partitions the amount to be removed among organs and pools. This is dependent on default preference values, which are currently set as 1. A series of checks is done to guarantee that mass balance is not affected by the removal of dry matter. The 'RemoveBiomass' method is more elaborate and allows to control the amount of each organ and pool that will be removed. The fractions to be removed can be set through a 'RemovalType' or a 'RemovalData' parameter. The 'RemovalType' is based on default fractions for organs (leaves, stems and stolons) with fractions for live and dead pools of dry matter to be removed and residual dry matter. The 'RemovalData' is optional and allows the fractions to be removed to be set up by the user.

    ![Graze method of biomass removal in AgPasture.](AgPastureGraze.png)

    ![Description of the RemoveBiomass method in AgPasture](AgPastureRemoveBiomass.png)

    Figure 6. RemoveBiomass method of biomass removal in AgPasture.

    Root distribution in AgPasture is give by a simple function, it follows an uniform distribution down to a certain depth, which can be set up by the user. From this depth on, the root system decreases following an exponential decline until no roots are present at the given maximum rooting depth (Figure 7).

    ![Example of a shallow, mid and deep distribution of roots in AgPasture.](AgPastureRootDistribution.png)
  Folder Validation
    Memo
      The validation of biomass production, N status, and relative species composition of AgPasture is done using a series of simulations based on a number of datasets.  The base validation uses the 'Radcliffe trials', a series of dataset of yield measured in exclusion cages on grass-clover pastures across New Zealand. The second set comprises of two long term dataset that contain more detailed informatin on management and pasture yield for each harvest, these are a subset of the 'Winchmore' irrigation and fertility trials, with data from ryegrass-clover mixed pastures under rainfed and irrigated conditions, and another set based on production trials in 'Ruakura' [#mccall2003pasture]. The third set of simulations is based on a fertilisty trial conducted in 'Lincoln' and 'Ruakura' for the Forages for Reducing Nitorgen Leaching programme (FRNL); this encompases two years of biomass and N uptake measurements under six N fertilisation rates for monocultures of ryegrass and white clover, plus a mix of the two (only in Ruakura).
    Folder Australia
      Experiment Mutdapilly9294
        Documentation Mutdapilly9294
          ## **Performance of temperate perennial pastures in the Australian subtropics 1. Yield, persistence and pasture quality**<h2>

          This simulation, Mutdapilly9294, aims to replicate the experiment conducted by [#Lowe_Bowdler_Casey_Moss]. under the following conditions:
          1. Location: Mutdapilly Research Station (26°46'S, 152°41'E; altitude: 70 m)
          2. Environment: Subtropical
          3. Soil: Heavy black clay alluvium (Ug5.16, Northcote 1971), poorly drained both internally and externally
          4. Climate: The three-year experimental period was hotter and drier than average, particularly during the latter half.
          5. Seedbed Preparation: Fully prepared in early April 1992
          6. Irrigation: Weekly irrigations of 10–15 mm were applied for the first four weeks, followed by fortnightly irrigations of 25 mm for the remainder of the experimental period, unless rainfall made irrigation unnecessary.
          7. Fertiliser: A basal application of 24 kg P/ha (as superphosphate), 60 kg K/ha (as muriate of potash), and 50 kg N/ha (as urea) was applied before sowing.

          **Simulation Parameters:**

          1. Cultivar: Yatyn
          2. Model Used: AGPRyegrass
          3. Duration: 30 March 1992 – 30 June 1995
          4. Weather File: Mutdapilly Research Station (Lat: -27.75, Long: 152.65)
          5. Sowing Date: 1 April 1992
          6. Irrigation: Fully irrigated
          7. Fertiliser Operations:
             - Urea N, 50 kg/ha applied before sowing on 1 March 1992
             - Urea N, 50 kg/ha applied again on 31 October 1993
             - Subsequently applied monthly until the end of the experiment (assumed)
          8. Report Variables: Biomass, LAIGreen, Irrigation, Water Stress, SoilNitrate, NConc, Crude Protien, Root Depth
          9. Observed Excel File: Mutdapilly9294.xlsx
        Factors
          Factor Irrigation: Specification=[Irrigated]
            Manager Full
              allowIrrigation = True
              seasonStart = 1-Jan
              seasonEnd = 31-Dec
              seasonsAllocation = 10000
              triggerDeficit = 80
              targetDeficit = 95
              returndays = 3
              maximumAmount = 30
              depthPAWC = 1200
```csharp
using Newtonsoft.Json;
using APSIM.Shared.Utilities;
using System.Xml.Serialization;
using Models.Soils;
using Models.PMF;
using Models.Core;
using System;
using System.Linq;
using Models.Interfaces;



        
namespace Models
{
    [Serializable] 
    [System.Xml.Serialization.XmlInclude(typeof(Model))]
    public class Script : Model
    {
        [Link] private ISummary summary;
        [Link] private Irrigation Irrigation;
        [Link] private Clock Clock;
        [Link] private Soil Soil;
        [Link(IsOptional = true)] private IPlant existingCrop;
        private DateTime StartDate;
        private DateTime EndDate;
        private double TopDUL;
        private double TopLL;
        private int nLayers;
        [Link]
        private IPhysical soilPhysical;
        [Link]
        private ISoilWater waterBalance;
        //Communication to other modules
       
        //User inputs from properties tab
        [Description("Turn irrigation on?")]
        public bool allowIrrigation { get; set; }
        [Description("Start of irrigation season (dd-MMM)")]
        public string seasonStart { get; set; }
        [Description("End of irrigation season (dd-MMM)")]
        public string seasonEnd { get; set; }
        [Description("Season allocation (mm)")]
        public double seasonsAllocation { get; set; }
        [Description("Deficit to trigger irrigation (% PAWC)")]
        public double triggerDeficit { get; set; }
        [Description("Deficit to stop irrigaton (% PAWC)")]
        public double targetDeficit { get; set; }
        [Description("Minimum days for irrigation to return")]
        public double returndays { get; set; }
        [Description("Maximum irrigation application (mm/day)")]
        public double maximumAmount { get; set; }
        [Description("Depth to calculate PAWC (mm)")]
        public double depthPAWC { get; set; }

        //Class members
        [JsonIgnore] public double TopSWdeficit { get; set; }
        [JsonIgnore] public double TopSWC { get; set; }
        [JsonIgnore] public double DaysSinceIrrigation { get; set; }
        [JsonIgnore] public double AmountToApply { get; set; }
        [JsonIgnore] public double SeasonAppliedAmount { get; set; }
        
        private bool IrrigationIsAllowed { get; set; }
        private bool SeasonIsOpen { get; set; }
        private bool CropIsActive { get; set; }
        private bool IrrigatorIsAvailable { get; set; }
        private bool SoilIsDry { get; set; }

    
        //Calculate static soil variables
        [EventSubscribe("StartOfSimulation")]
        private void OnStartOfSimulation(object sender, EventArgs e)
        {   
            //Set the season dates
            StartDate = DateTime.Parse(seasonStart + "-" + Clock.Today.Year.ToString());
            EndDate = DateTime.Parse(seasonEnd + "-" + Clock.Today.Year.ToString());
            
            //Can we irrigate at all?
            IrrigationIsAllowed = false; 
            if (allowIrrigation)
                IrrigationIsAllowed = true; 

            //Calculate soil water variables
            double depthFromSurface = 0.0;
            double fracLayer = 0.0;
            nLayers = soilPhysical.Thickness.Length;
            for (int layer = 0; layer < nLayers; layer++)
            {
                fracLayer = Math.Min(1.0, (depthPAWC - depthFromSurface) / soilPhysical.Thickness[layer]);
                TopLL += soilPhysical.LL15mm[layer] * fracLayer;
                TopDUL += soilPhysical.DULmm[layer] * fracLayer;
                depthFromSurface += soilPhysical.Thickness[layer];
                if (depthFromSurface >= depthPAWC)
                    layer = nLayers;
            }
        }
             
        //Determine daily requirement for irrigation
        [EventSubscribe("StartOfDay")]
        private void OnStartOfDay(object sender, EventArgs e)
        {
            //Can we irrigate today?          
            SeasonIsOpen = isBetween(Clock.Today, StartDate, EndDate);
            if (!SeasonIsOpen)
                SeasonAppliedAmount = 0;

            //Is there a crop in the ground that needs irrigation?
            CropIsActive = false;
            if ((existingCrop != null) && (existingCrop.IsAlive))
                CropIsActive = true;
            //if ((existingCrop.Phenology.Stage >= 3.0) && (existingCrop.Phenology.Stage < 6.0))
          
            //Is the irrigator available?
            IrrigatorIsAvailable = false;
            DaysSinceIrrigation += 1;
            if (DaysSinceIrrigation >= returndays)
                IrrigatorIsAvailable = true;
          
            //Is the soil dry enough to require irrigation?
            SoilIsDry = false;
            double depthFromSurface = 0.0;
            double fracLayer = 0.0;
            TopSWC = 0.0;
            for (int layer = 0; layer < nLayers; layer++)
            //for (int layer = 0; depthFromSurface < depthPAWC + soilPhysical.Thickness[layer]; layer++)
            {
                fracLayer = Math.Min(1.0, (depthPAWC - depthFromSurface) / soilPhysical.Thickness[layer]);
                TopSWC += waterBalance.SWmm[layer] * fracLayer;
                depthFromSurface += soilPhysical.Thickness[layer];
                if (depthFromSurface >= depthPAWC)
                    layer = nLayers;
            }
            
            TopSWdeficit = TopSWC - TopDUL;
            if (Math.Max(0.0, -TopSWdeficit) >= (TopDUL - TopLL) * (100 - triggerDeficit) / 100)
                SoilIsDry = true;
                
            //Are all the conditions ratifying irrigation
            if (IrrigationIsAllowed && SeasonIsOpen && CropIsActive && IrrigatorIsAvailable && SoilIsDry)
            {
                //Lets bloody well irrigate then!!!!
                AmountToApply = TopDUL * targetDeficit / 100 - TopSWC;
                AmountToApply = Math.Max(0.0, Math.Min(AmountToApply, seasonsAllocation - SeasonAppliedAmount));
                AmountToApply = Math.Min(AmountToApply,maximumAmount);
                Irrigation.Apply(AmountToApply);
                DaysSinceIrrigation = 0;
                SeasonAppliedAmount += AmountToApply;
            }
        }
        
        ///Checks whether theDate is between iniDate and endDate (non-year specific)
        private bool isBetween(DateTime theDay, DateTime iniDate, DateTime endDate)
        {
            bool result = false;
            if (iniDate.DayOfYear < endDate.DayOfYear)
            {
                // period is within one year, ex: summer in the northern hemisphere
                if ((theDay.DayOfYear >= iniDate.DayOfYear) && (theDay.DayOfYear <= endDate.DayOfYear))
                    result = true;
            }
            else
            {
                // period goes over the end of the year, ex: summer in the southern hemisphere
                if ((theDay.DayOfYear >= iniDate.DayOfYear) || (theDay.DayOfYear <= endDate.DayOfYear))
                    result = true;
            }
            
            return result;
        }
    }
}
```
        Simulation Mutdapilly9294Base
          Clock: Start=1992-03-30; End=1995-06-30
          Weather: FileName=Mutdapilly Research Station.met
          Summary summaryfile
          SoilArbitrator Soil Arbitrator
          MicroClimate: a_interception=0; b_interception=1; c_interception=0; d_interception=0; SoilHeatFluxFraction=0.4; MinimumHeightDiffForNewLayer=0; NightInterceptionFraction=0.5; ReferenceHeight=2
          Zone Field: Area=1; Slope=0; AspectAngle=0; Altitude=50
            Operations Management
              1992-04-01  [AgPRyegrass].Sow(population: 1, cultivar: "Yatsyn", depth: 5, rowSpacing: 150)
              1992-04-01  [Fertiliser].Apply(amount: 50, type: "UreaN")
              1993-10-31  [Fertiliser].Apply(amount: 50, type: "UreaN")
              1993-11-30  [Fertiliser].Apply(amount: 50, type: "UreaN")
              1993-12-31  [Fertiliser].Apply(amount: 50, type: "UreaN")
              1994-01-31  [Fertiliser].Apply(amount: 50, type: "UreaN")
              1994-02-28  [Fertiliser].Apply(amount: 50, type: "UreaN")
              1994-03-31  [Fertiliser].Apply(amount: 50, type: "UreaN")
              1994-04-30  [Fertiliser].Apply(amount: 50, type: "UreaN")
              1994-05-31  [Fertiliser].Apply(amount: 50, type: "UreaN")
              1994-06-30  [Fertiliser].Apply(amount: 50, type: "UreaN")
              1994-07-31  [Fertiliser].Apply(amount: 50, type: "UreaN")
              1994-08-31  [Fertiliser].Apply(amount: 50, type: "UreaN")
              1994-09-30  [Fertiliser].Apply(amount: 50, type: "UreaN")
              1994-10-31  [Fertiliser].Apply(amount: 50, type: "UreaN")
              1994-11-30  [Fertiliser].Apply(amount: 50, type: "UreaN")
              1994-12-31  [Fertiliser].Apply(amount: 50, type: "UreaN")
              1995-01-31  [Fertiliser].Apply(amount: 50, type: "UreaN")
              1995-02-28  [Fertiliser].Apply(amount: 50, type: "UreaN")
              1995-03-31  [Fertiliser].Apply(amount: 50, type: "UreaN")
              1995-04-30  [Fertiliser].Apply(amount: 50, type: "UreaN")
              1995-05-31  [Fertiliser].Apply(amount: 50, type: "UreaN")
              1995-06-30  [Fertiliser].Apply(amount: 50, type: "UreaN")
            Irrigation
            Fertiliser
            SurfaceOrganicMatter: InitialResidueName=grass; InitialResidueType=grass; InitialResidueMass=1000; InitialStandingFraction=0; InitialCPR=0; InitialCNR=25
            PastureSpecies AgPRyegrass: doyGermination=275; daysEmergenceToAnthesis=120; daysAnthesisToMaturity=85; degreesDayForAnthesis=1100; degreesDayForMaturity=900; daysAnnualsFactor=45; CanopyType=PastureSpecies; InitialShootDM=0; InitialRootDM=0; InitialRootDepth=0; initialDMFractionsGrasses=[0.15, 0.25, 0.25, 0.05, 0.05, 0.1, 0.1, 0.05, 0, 0, 0]; initialDMFractionsForbs=[0.2, 0.2, 0.15, 0.05, 0.1, 0.15, 0.1, 0.05, 0, 0, 0]; PhotosyntheticEfficiency=0.01; PhotosynthesisCurveFactor=0.8; FractionPAR=0.5; ReferenceCO2=380; CO2EffectScaleFactor=700; CO2EffectOffsetFactor=600; CO2EffectMinimum=0.7; CO2EffectExponent=2; ReproSeasonDurationCoeff=2; ReproSeasonShouldersLengthFactor=1; ReproSeasonOnsetDurationFactor=0.6; RelativeTurnoverEmerging=2; DetachmentDroughtCoefficient=3; DetachmentDroughtEffectMin=0.1; TurnoverStockFactor=0.01; TurnoverDefoliationEffectMin=0.025; MinimumGreenLeafProp=0.8; MinimumGreenRootProp=0.5; ResourceName=AGPRyegrass
              initialDMFractionsLegumes=[0.16, 0.23, 0.22, 0.05, 0.03, 0.05, 0.05, 0.01, 0.04, 0.08, 0.08]
              LinearInterpolationFunction FVPDFunction
            Report: EventNames=[Clock].DoReport
              VariableNames:
                [Clock].Today
                [Clock].Today.Year as Year
                [Irrigation].IrrigationApplied
                // plant outputs
                [AgPRyegrass].AboveGroundWt
                [AgPRyegrass].AboveGround.Wt
                [AgPRyegrass].AboveGroundNConc
                [AgPRyegrass].AboveGroundHarvestable.Wt
                Sum of [AgPRyegrass].HarvestedWt *0.1 from 1-Jan to 31-Dec as AnnualPastureYield
                [AgPRyegrass].Leaf.DigestibilityLive
                [AgPRyegrass].Stem.DigestibilityLive
                [AgPRyegrass].Harvestable.Digestibility
                [AgPRyegrass].HarvestedME
                [AgPRyegrass].BelowGroundWt
                [AgPRyegrass].GlfWaterSupply
                [AgPRyegrass].GlfNContent
                [AgPRyegrass].Leaf.Live.Wt
                [AgPRyegrass].Leaf.Live.NConc
                ([AgPRyegrass].Leaf.Live.NConc *6.25) as LeafCrudeProtien
                [AgPRyegrass].Leaf.Dead.Wt
                [AgPRyegrass].LAIGreen
                [AgPRyegrass].Stem.Live.Wt
                [AgPRyegrass].Stem.Live.NConc
                ([AgPRyegrass].Stem.Live.NConc*6.25) as StemCrudeProtien
                sum([Soil].NO3.kgha)
                [AgPRyegrass].Root.Depth
                [AGPRyegrass].AboveGround.Wt
            Manager Irrigated: same as Validation.Australia.Mutdapilly9294.Factors.Irrigation.Full
            Soil: SoilType=APS26Soil; LocalName=APS26Site; Site=APS26Site; NearestTown=Unknown; Region=Lawes; NaturalVegetation=Unknown; Latitude=0; Longitude=0
              Physical
                Thickness  ParticleSizeSand  ParticleSizeSilt  ParticleSizeClay  Rocks  BD    AirDry  LL15  DUL   SAT
                150        5                 65                30                0      1.38  0.1     0.2   0.38  0.44
                150        5                 65                30                0      1.38  0.1     0.2   0.38  0.44
                300        5                 65                30                0      1.38  0.1     0.2   0.38  0.44
                300        5                 65                30                0      1.38  0.1     0.2   0.38  0.44
                300        5                 65                30                0      1.46  0.1     0.21  0.38  0.43
                300        5                 65                30                0      1.51  0.1     0.19  0.4   0.42
                300        5                 65                30                0      1.49  0.1     0.14  0.38  0.43
                300        5                 65                30                0      1.47  0.1     0.14  0.38  0.43
                300        5                 65                30                0      1.47  0.1     0.19  0.33  0.43
                Rocks, ParticleSizeSand, ParticleSizeSilt, ParticleSizeClay source: Calculated
                SoilCrop AGPRyegrassSoil: LL=[0.24, 0.24, 0.22, 0.24, 0.23, 0.23, 0.18, 0.18, 0.18]; KL=[0.06, 0.045, 0.045, 0.04, 0.04, 0.06, 0.06, 0.06, 0.06]; XF=[1, 1, 1, 1, 1, 1, 1, 1, 1]
              WaterBalance SoilWater: SummerDate=1-Nov; SummerU=6; SummerCona=3.5; WinterDate=1-Apr; WinterU=6; WinterCona=3.5; DiffusConst=10; DiffusSlope=16; Salb=0.13; CN2Bare=78; CNRed=20; CNCov=0.8; DischargeWidth=0; CatchmentArea=0; PSIDul=-100
                Thickness  SWCON  KLAT
                150        0.3    0
                150        0.3    0
                150        0.3    0
                150        0.3    0
                300        0.3    0
                300        0.3    0
                300        0.3    0
                300        0.3    0
                300        0.3    0
                300        0.3    0
              Organic: FOMCNRatio=40; CarbonUnits=Total
                Thickness  Carbon  SoilCNRatio  FBiom  FInert  FOM
                150        2.2     14.5         0.05   0.45    118.866
                150        1.6     14.5         0.024  0.6     98.5437
                150        1.35    14.5         0.01   0.7     81.6956
                150        0.95    14.5         0.01   0.85    67.728
                300        1       14.5         0.01   0.9     46.5487
                300        0.8     14.5         0.01   0.95    31.9925
                300        0.45    14.5         0.01   0.95    21.9881
                300        0.45    14.5         0.01   0.95    15.1122
                300        0.45    14.5         0.01   0.95    10.3864
                300        0.45    14.5         0.01   0.95    7.13848
              Chemical: PHUnits=Water
                Thickness  PH   CEC
                150        7.5  13.295
                150        8    11.945
                150        8    11.3825
                150        8    10.4825
                300        8    10.595
                300        8    10.145
                300        8    9.3575
                300        8    9.3575
                300        8    9.3575
                300        8    9.3575
                CEC source: Calculated
              Water: Thickness=[150, 150, 150, 150, 300, 300, 300, 300, 300, 300]; FilledFromTop=false
                InitialValues=[0.3274, 0.3429, 0.334, 0.334, 0.3303, 0.3106, 0.306, 0.2694, 0.269, 0.269]
              Nutrient
              Solute NO3: Thickness=[150, 150, 150, 150, 300, 300, 300, 300, 300, 300]; InitialValues=[20, 30, 10, 1.5, 0.4, 0.2, 0.4, 0.3, 0.3, 0.3]; InitialValuesUnits=ppm; WaterTableConcentration=0; D0=0; DepthConstant=0; MaxDepthSoluteAccessible=0; RunoffEffectivenessAtMovingSolute=0; MaxEffectiveRunoff=0
              Solute NH4: Thickness=[150, 150, 150, 150, 300, 300, 300, 300, 300, 300]; InitialValues=[0.5, 0.8, 0.5, 0.5, 0.42, 0.42, 0.37, 0.25, 0.3, 0.3]; InitialValuesUnits=ppm; WaterTableConcentration=0; D0=0; DepthConstant=0; MaxDepthSoluteAccessible=0; RunoffEffectivenessAtMovingSolute=0; MaxEffectiveRunoff=0
              Solute Urea: Thickness=[150, 150, 150, 150, 300, 300, 300, 300, 300, 300]; InitialValues=[0, 0, 0, 0, 0, 0, 0, 0, 0, 0]; InitialValuesUnits=kg/ha; WaterTableConcentration=0; D0=0; DepthConstant=0; MaxDepthSoluteAccessible=0; RunoffEffectivenessAtMovingSolute=0; MaxEffectiveRunoff=0
              SoilTemperature Temperature
      Experiment Gatton9597
        Documentation Gatton9597
          ### Seasonal variation in the herbage yield and nutritive value of perennial ryegrass (Lolium perenne L.) cultivars with high or normal herbage water-soluble carbohydrate concentrations grown in three contrasting Australian dairy environments <h3>

          This simulation, Gatton9597 aims to replicate the experiment conducted by [#Smith_Simpson_Oram] under the following conditions:
          1. Location: Gatton QLD,
          2. Environment:
          3. Soil: Not found in paper
          4. Irrigation:
          5. Cultivars: Aurora, Ba 11351,Ellett,Vedette,Kangaroo Valley
          6. Fertilisation: Not mentioned in paper
          7. Sow: Plots at the Gatton site were resown in the autumn of 1996 as the 1995 sowing failed to survive a period of extremely hot
          8. Defoliation: Harvest dates as per the schedule in [#Smith_Simpson_Oram].

          **Simulation Parameters:**

          1. **Cultivars:**  Aurora, Ba 11351, Ellett, Vedette, Kangaroo Valley
          2. **Model used:** AGPRyegrass
          3. **Clock:** 26/02/1995 - 30/06/1997
          4. **Weather file:** Gatton.met
          5. **Sowing Date:** 1995-03-1995
          6. **Resown:** 1996/03/01
          7. **Irrigation:** Full irrigated
          8. **Fertiliser Operations:** Fertiliser dates and rates are unknown but the paper says agronomy was to APPEC protocol for Perennial ryegrass.  We assume that N was non-limiting.
             * Operations is used in the simulation applying 50 kh/ha UreaN every month
          9. **Report Variables:** Biomass, LAIGreen, Irrigation,Water Stress, Nitrogen Stress, SoilNitrate, NConc, Digestibility, Crude Protien
        Factors
          Factor Cultivar: Specification=[Sowing]
            Operations Aurora
              1995-05-01  [AgPRyegrass].Sow(population: 1, cultivar: "Aurora", depth: 5, rowSpacing: 150)
              1995-12-31  [AGPRyegrass].EndCrop()
              1996-06-01  [AgPRyegrass].Sow(population: 1, cultivar: "Aurora", depth: 5, rowSpacing: 150)
            Operations Ba11351
              1995-05-01  [AgPRyegrass].Sow(population: 1, cultivar: "Ba11351", depth: 5, rowSpacing: 150)
              1995-12-31  [AGPRyegrass].EndCrop()
              1996-06-01  [AgPRyegrass].Sow(population: 1, cultivar: "Ba11351", depth: 5, rowSpacing: 150)
            Operations Ellett
              1995-05-01  [AgPRyegrass].Sow(population: 1, cultivar: "Ellett", depth: 5, rowSpacing: 150)
              1995-12-31  [AGPRyegrass].EndCrop()
              1996-06-01  [AgPRyegrass].Sow(population: 1, cultivar: "Ellett", depth: 5, rowSpacing: 150)
            Operations Vedette
              1995-05-01  [AgPRyegrass].Sow(population: 1, cultivar: "Vedette", depth: 5, rowSpacing: 150)
              1995-12-31  [AGPRyegrass].EndCrop()
              1996-06-01  [AgPRyegrass].Sow(population: 1, cultivar: "Vedette", depth: 5, rowSpacing: 150)
            Operations KangarooValley
              1995-05-01  [AgPRyegrass].Sow(population: 1, cultivar: "KangarooValley", depth: 5, rowSpacing: 150)
              1995-12-31  [AGPRyegrass].EndCrop()
              1996-06-01  [AgPRyegrass].Sow(population: 1, cultivar: "KangarooValley", depth: 5, rowSpacing: 150)
        Simulation Gatton9597Base
          Clock: Start=1995-02-26; End=1997-06-30
          Weather: FileName=Gatton.met
          Summary summaryfile
          SoilArbitrator Soil Arbitrator
          MicroClimate: a_interception=0; b_interception=1; c_interception=0; d_interception=0; SoilHeatFluxFraction=0.4; MinimumHeightDiffForNewLayer=0; NightInterceptionFraction=0.5; ReferenceHeight=2
          Zone Field: Area=1; Slope=0; AspectAngle=0; Altitude=50
            Operations Sowing
            Operations FertiliserManagement
              1995-06-05  [Fertiliser].Apply(amount: 50, type: "UreaN")
              1995-07-03  [Fertiliser].Apply(amount: 50, type: "UreaN")
              1995-07-31  [Fertiliser].Apply(amount: 50, type: "UreaN")
              1995-08-28  [Fertiliser].Apply(amount: 50, type: "UreaN")
              1995-09-20  [Fertiliser].Apply(amount: 50, type: "UreaN")
              1995-10-19  [Fertiliser].Apply(amount: 50, type: "UreaN")
              1995-11-24  [Fertiliser].Apply(amount: 50, type: "UreaN")
              1995-05-18  [Fertiliser].Apply(amount: 50, type: "UreaN")
              1996-09-06  [Fertiliser].Apply(amount: 50, type: "UreaN")
              1996-10-03  [Fertiliser].Apply(amount: 50, type: "UreaN")
              1996-10-31  [Fertiliser].Apply(amount: 50, type: "UreaN")
              1996-11-27  [Fertiliser].Apply(amount: 50, type: "UreaN")
              1996-12-23  [Fertiliser].Apply(amount: 50, type: "UreaN")
              1997-01-20  [Fertiliser].Apply(amount: 50, type: "UreaN")
              1997-02-20  [Fertiliser].Apply(amount: 50, type: "UreaN")
              1997-03-20  [Fertiliser].Apply(amount: 50, type: "UreaN")
              1997-04-28  [Fertiliser].Apply(amount: 50, type: "UreaN")
              1997-05-22  [Fertiliser].Apply(amount: 50, type: "UreaN")
            Irrigation
            Fertiliser
            SurfaceOrganicMatter: InitialResidueName=grass; InitialResidueType=grass; InitialResidueMass=1000; InitialStandingFraction=0; InitialCPR=0; InitialCNR=25
            PastureSpecies AGPRyegrass: same as Validation.Australia.Mutdapilly9294.Mutdapilly9294Base.Field.AgPRyegrass
            Report: EventNames=[Clock].DoReport
              VariableNames:
                [Clock].Today
                [Clock].Today.Year as Year
                [Irrigation].IrrigationApplied
                // plant outputs
                [AgPRyegrass].AboveGroundWt
                [AgPRyegrass].AboveGround.Wt
                [AgPRyegrass].AboveGroundNConc
                [AgPRyegrass].AboveGroundHarvestable.Wt
                Sum of [AgPRyegrass].HarvestedWt *0.1 from 1-Jan to 31-Dec as AnnualPastureYield
                [AgPRyegrass].Leaf.DigestibilityLive
                [AgPRyegrass].Stem.DigestibilityLive
                [AgPRyegrass].Harvestable.Digestibility
                [AgPRyegrass].BelowGroundWt
                [AgPRyegrass].GlfWaterSupply
                [AgPRyegrass].GlfNContent
                [AgPRyegrass].Leaf.Live.Wt
                [AgPRyegrass].Leaf.Live.NConc
                [AgPRyegrass].Leaf.Dead.Wt
                [AgPRyegrass].LAIGreen
                [AgPRyegrass].Stem.Live.Wt
                [AgPRyegrass].Stem.Live.NConc
                [AgPRyegrass].TotalWt
                //[AgPRyegrass].AboveGroundCrudeProtein
                sum([Soil].NO3.kgha)
            Manager Irrigated: same as Validation.Australia.Mutdapilly9294.Factors.Irrigation.Full
            Soil: same as Validation.Australia.Mutdapilly9294.Mutdapilly9294Base.Field.Soil
            Operations DefoliationSchedule
              1995-06-05  [AgPRyegrass].RemoveBiomass(amount: 500, type: "SetResidueAmount")
              1995-07-03  [AgPRyegrass].RemoveBiomass(amount: 500, type: "SetResidueAmount")
              1995-07-31  [AgPRyegrass].RemoveBiomass(amount: 500, type: "SetResidueAmount")
              1995-08-28  [AgPRyegrass].RemoveBiomass(amount: 500, type: "SetResidueAmount")
              1995-09-20  [AgPRyegrass].RemoveBiomass(amount: 500, type: "SetResidueAmount")
              1995-10-19  [AgPRyegrass].RemoveBiomass(amount: 500, type: "SetResidueAmount")
              1995-11-24  [AgPRyegrass].RemoveBiomass(amount: 500, type: "SetResidueAmount")
              1996-09-06  [AgPRyegrass].RemoveBiomass(amount: 500, type: "SetResidueAmount")
              1996-10-03  [AgPRyegrass].RemoveBiomass(amount: 500, type: "SetResidueAmount")
              1996-10-31  [AgPRyegrass].RemoveBiomass(amount: 500, type: "SetResidueAmount")
              1996-11-27  [AgPRyegrass].RemoveBiomass(amount: 500, type: "SetResidueAmount")
              1996-12-23  [AgPRyegrass].RemoveBiomass(amount: 500, type: "SetResidueAmount")
              1997-01-20  [AgPRyegrass].RemoveBiomass(amount: 500, type: "SetResidueAmount")
              1997-02-20  [AgPRyegrass].RemoveBiomass(amount: 500, type: "SetResidueAmount")
              1997-03-20  [AgPRyegrass].RemoveBiomass(amount: 500, type: "SetResidueAmount")
              1997-04-28  [AgPRyegrass].RemoveBiomass(amount: 500, type: "SetResidueAmount")
              1997-05-22  [AgPRyegrass].RemoveBiomass(amount: 500, type: "SetResidueAmount")
      Experiment Kyabram9597
        Documentation Kyabram95971
          ### Seasonal variation in the herbage yield and nutritive value of perennial ryegrass (Lolium perenne L.) cultivars with high or normal herbage water-soluble carbohydrate concentrations grown in three contrasting Australian dairy environments <h3>

          This simulation, Kyabram9597 aims to replicate the experiment conducted by [#Smith_Simpson_Oram] under the following conditions:
          1. Location: Kyabram QLD.
          3. Soil: Not found in paper
          4. Irrigation: Fully irrigated
          5. Cultivars: Aurora, Ba 11351, Ellett, Vedette, Kangaroo Valley
          6. Fertilisation: Not mentioned in paper
          7. Sow: Plots at the Gatton site were resown in the autumn of 1996 as the 1995 sowing failed to survive a period of extremely hot
          8. Defoliation: Harvest dates as per the schedule in K.F.Smith et al.

          **Simulation Parameters:**

          1. **Cultivars:**  Aurora, Ba 11351, Ellett, Vedette, Kangaroo Valley
          2. **Model used:** AGPRyegrass
          3. **Clock:** 26/02/1995 - 30/06/1997
          4. **Weather file:** Kyabram.met
          5. **Sowing Date:** 1995-03-1995
          6. **Resown:** 1996/03/01
          7. **Irrigation:** Full irrigated
          8. **Fertiliser Operations:** Fertiliser dates and rates are unknown but the paper says agronomy was to APPEC protocol for Perennial ryegrass.  We assume that N was non-limiting.
          	* Operations is used in the simulation applying 50 kh/ha UreaN every month
          9. **Experiment factors**: Cultivars
          10. **Report Variables:** Biomass, LAIGreen, Irrigation,Water Stress, Nitrogen Stress, SoilNitrate, NConc, Digestibility, Crude Protien
        Factors
          Factor Cultivar: Specification=[Sowing]
            Operations Aurora
              1995-06-01  [AgPRyegrass].Sow(population: 1, cultivar: "Aurora", depth: 5, rowSpacing: 150)
            Operations Ba11351
              1995-06-01  [AgPRyegrass].Sow(population: 1, cultivar: "Ba11351", depth: 5, rowSpacing: 150)
            Operations Ellett
              1995-06-01  [AgPRyegrass].Sow(population: 1, cultivar: "Ellett", depth: 5, rowSpacing: 150)
            Operations Vedette
              1995-06-01  [AgPRyegrass].Sow(population: 1, cultivar: "Vedette", depth: 5, rowSpacing: 150)
            Operations KangarooValley
              1995-06-01  [AgPRyegrass].Sow(population: 1, cultivar: "KangarooValley", depth: 5, rowSpacing: 150)
        Simulation Kyabram9597
          Clock: Start=1995-02-26; End=1997-06-30
          Weather: FileName=Kyabram.met
          Summary summaryfile
          SoilArbitrator Soil Arbitrator
          MicroClimate: a_interception=0; b_interception=1; c_interception=0; d_interception=0; SoilHeatFluxFraction=0.4; MinimumHeightDiffForNewLayer=0; NightInterceptionFraction=0.5; ReferenceHeight=2
          Zone Field: Area=1; Slope=0; AspectAngle=0; Altitude=50
            Operations Sowing
            Operations FertiliserManagement
              1995-03-01  [Fertiliser].Apply(amount: 50, type: "UreaN")
              1995-10-31  [Fertiliser].Apply(amount: 50, type: "UreaN")
              1995-11-30  [Fertiliser].Apply(amount: 50, type: "UreaN")
              1995-12-31  [Fertiliser].Apply(amount: 50, type: "UreaN")
              1996-01-31  [Fertiliser].Apply(amount: 50, type: "UreaN")
              1996-02-28  [Fertiliser].Apply(amount: 50, type: "UreaN")
              1996-03-31  [Fertiliser].Apply(amount: 50, type: "UreaN")
              1996-04-30  [Fertiliser].Apply(amount: 50, type: "UreaN")
              1996-05-31  [Fertiliser].Apply(amount: 50, type: "UreaN")
              1996-06-30  [Fertiliser].Apply(amount: 50, type: "UreaN")
              1996-07-31  [Fertiliser].Apply(amount: 50, type: "UreaN")
              1996-08-31  [Fertiliser].Apply(amount: 50, type: "UreaN")
              1996-09-30  [Fertiliser].Apply(amount: 50, type: "UreaN")
              1996-10-31  [Fertiliser].Apply(amount: 50, type: "UreaN")
              1996-11-30  [Fertiliser].Apply(amount: 50, type: "UreaN")
              1996-12-31  [Fertiliser].Apply(amount: 50, type: "UreaN")
              1997-01-30  [Fertiliser].Apply(amount: 50, type: "UreaN")
              1997-02-28  [Fertiliser].Apply(amount: 50, type: "UreaN")
              1997-03-31  [Fertiliser].Apply(amount: 50, type: "UreaN")
              1997-04-30  [Fertiliser].Apply(amount: 50, type: "UreaN")
              1997-04-30  [Fertiliser].Apply(amount: 50, type: "UreaN")
              1997-05-31  [Fertiliser].Apply(amount: 50, type: "UreaN")
              1997-06-30  [Fertiliser].Apply(amount: 50, type: "UreaN")
              1997-07-31  [Fertiliser].Apply(amount: 50, type: "UreaN")
            Irrigation
            Fertiliser
            SurfaceOrganicMatter: InitialResidueName=grass; InitialResidueType=grass; InitialResidueMass=1000; InitialStandingFraction=0; InitialCPR=0; InitialCNR=25
            PastureSpecies AGPRyegrass: same as Validation.Australia.Mutdapilly9294.Mutdapilly9294Base.Field.AgPRyegrass
            Report: EventNames=[Clock].DoReport
              VariableNames:
                [Clock].Today
                [Clock].Today.Year as Year
                [Irrigation].IrrigationApplied
                // plant outputs
                [AgPRyegrass].AboveGroundWt
                [AgPRyegrass].AboveGround.Wt
                [AgPRyegrass].AboveGroundHarvestable.Wt
                //[AgPRyegrass].HarvestableLive.Wt
                Sum of [AgPRyegrass].HarvestedWt *0.1 from 1-Jan to 31-Dec as AnnualPastureYield
                [AgPRyegrass].AboveGroundNConc
                [AgPRyegrass].Leaf.DigestibilityLive
                [AgPRyegrass].Stem.DigestibilityLive
                [AgPRyegrass].Harvestable.Digestibility
                [AgPRyegrass].BelowGroundWt
                [AgPRyegrass].GlfWaterSupply
                [AgPRyegrass].GlfNContent
                [AgPRyegrass].Leaf.Live.Wt
                [AgPRyegrass].Leaf.Live.NConc
                [AgPRyegrass].Leaf.Dead.Wt
                [AgPRyegrass].LAIGreen
                [AgPRyegrass].Stem.Live.Wt
                [AgPRyegrass].Stem.Live.NConc
                [AgPRyegrass].TotalWt
                //[AgPRyegrass].AboveGroundCrudeProtein
                sum([Soil].NO3.kgha)
            Manager Irrigated: same as Validation.Australia.Mutdapilly9294.Factors.Irrigation.Full
            Soil: same as Validation.Australia.Mutdapilly9294.Mutdapilly9294Base.Field.Soil
            Operations DefoliationSchedule
              1995-08-30  [AgPRyegrass].RemoveBiomass(amount: 1500, type: "SetResidueAmount")
              1995-09-26  [AgPRyegrass].RemoveBiomass(amount: 1500, type: "SetResidueAmount")
              1995-10-19  [AgPRyegrass].RemoveBiomass(amount: 1500, type: "SetResidueAmount")
              1995-11-10  [AgPRyegrass].RemoveBiomass(amount: 1500, type: "SetResidueAmount")
              1995-12-27  [AgPRyegrass].RemoveBiomass(amount: 1500, type: "SetResidueAmount")
              1995-02-16  [AgPRyegrass].RemoveBiomass(amount: 1500, type: "SetResidueAmount")
              1996-03-18  [AgPRyegrass].RemoveBiomass(amount: 1500, type: "SetResidueAmount")
              1996-05-18  [AgPRyegrass].RemoveBiomass(amount: 1500, type: "SetResidueAmount")
              1996-06-05  [AgPRyegrass].RemoveBiomass(amount: 1500, type: "SetResidueAmount")
              1996-09-01  [AgPRyegrass].RemoveBiomass(amount: 1500, type: "SetResidueAmount")
              1996-10-01  [AgPRyegrass].RemoveBiomass(amount: 1500, type: "SetResidueAmount")
              1996-11-01  [AgPRyegrass].RemoveBiomass(amount: 1500, type: "SetResidueAmount")
              1996-12-01  [AgPRyegrass].RemoveBiomass(amount: 1500, type: "SetResidueAmount")
      Folder NitrogenExperiment
        Folder KairiNitrogenExperiment
          Documentation KairiNitrogenExperiment
            ## **Comparative productivity of irrigated short-term ryegrass (Lolium multiflorum) pasture receiving nitrogen, grown alone or in a mixture with white (Trifolium repens) and Persian (T. resupinatum) clovers**<h3>

            This folder consists of 3 experiments conducted across 3 years in Kairi. The simulations in these experiments aim to replicate the experiment conducted by [#Lowe_Fulkerson_Walker] under the following conditions:
            1. Location: Tropical upland environment of the Atherton Tableland in Kairi Queensland
            2. Seedbed: All experiments were sown in late March or early April by broadcasting seed onto the surface and rolling before irrgation
            3. Irrigation: Irrigation of 12 mm was applied to the experiments every 5 days for first 4 weeks with 25mm applied every 14 days subsequently
            4. Defoliation: After initial period of about 6 weeks all experiment plots were defoliated with reciprocating balde mower or rotary mower to 5cm above ground.
            5. Defoliation Frequency: defoliation was done 4 weekly basis in 1991 and from June to August 1993
            6. Fertilizers Nitrogen (Urea) applied: 0, 25, 37.5, 50, 75, 100, 150
            5. Species: Lolium multiflorum
            6. Duration: 1991, 1993, 1994

            **Simulation Parameters:**
            1. Model used: AGPRyegrass
            2. Duration: 1991, 1993, 1994
            3. Sowing Date:01-01-1991, 01-01-1993, 01-01-1994
            4. Irrigation: Fully irrigated. Used manager script
            5. Fertiliser Operations: Used Opertions to match the schedule in [#Lowe_Fulkerson_Walker].
            6. Defoliation schedule: Used operations to match the schedule in [#Lowe_Fulkerson_Walker].
            6. Experiment factors: Fertilisation applied
            7. Report variables: AboveGroundHarvestable Weight, NConc,Nitrogen stress, Water Stress, Irrigation
          Experiment Kairi93
            Factors
              Factor Fertiliser: Specification=[FertilisationSchedule]
                Operations Nitrogen0
                  1991-04-01  [Fertiliser].Apply(amount: 0, type: "UreaN")
                  1991-05-01  [Fertiliser].Apply(amount: 0, type: "UreaN")
                  1991-06-01  [Fertiliser].Apply(amount: 0, type: "UreaN")
                  1991-07-01  [Fertiliser].Apply(amount: 0, type: "UreaN")
                  1991-08-01  [Fertiliser].Apply(amount: 0, type: "UreaN")
                  1991-09-01  [Fertiliser].Apply(amount: 0, type: "UreaN")
                  1991-10-01  [Fertiliser].Apply(amount: 0, type: "UreaN")
                  1991-11-01  [Fertiliser].Apply(amount: 0, type: "UreaN")
                  1991-12-01  [Fertiliser].Apply(amount: 0, type: "UreaN")
                  1992-01-01  [Fertiliser].Apply(amount: 0, type: "UreaN")
                  1992-02-01  [Fertiliser].Apply(amount: 0, type: "UreaN")
                  1992-03-01  [Fertiliser].Apply(amount: 0, type: "UreaN")
                  1992-04-01  [Fertiliser].Apply(amount: 0, type: "UreaN")
                  1992-05-01  [Fertiliser].Apply(amount: 0, type: "UreaN")
                  1992-06-01  [Fertiliser].Apply(amount: 0, type: "UreaN")
                  1992-07-01  [Fertiliser].Apply(amount: 0, type: "UreaN")
                  1992-08-01  [Fertiliser].Apply(amount: 0, type: "UreaN")
                  1992-09-01  [Fertiliser].Apply(amount: 0, type: "UreaN")
                  1992-10-01  [Fertiliser].Apply(amount: 0, type: "UreaN")
                  1992-11-01  [Fertiliser].Apply(amount: 0, type: "UreaN")
                  1992-12-01  [Fertiliser].Apply(amount: 0, type: "UreaN")
                  1993-01-01  [Fertiliser].Apply(amount: 0, type: "UreaN")
                  1993-02-01  [Fertiliser].Apply(amount: 0, type: "UreaN")
                  1993-03-01  [Fertiliser].Apply(amount: 0, type: "UreaN")
                  1993-04-01  [Fertiliser].Apply(amount: 0, type: "UreaN")
                  1993-05-01  [Fertiliser].Apply(amount: 0, type: "UreaN")
                  1993-06-01  [Fertiliser].Apply(amount: 0, type: "UreaN")
                  1993-07-01  [Fertiliser].Apply(amount: 0, type: "UreaN")
                  1993-08-01  [Fertiliser].Apply(amount: 0, type: "UreaN")
                  1993-09-01  [Fertiliser].Apply(amount: 0, type: "UreaN")
                  1993-10-01  [Fertiliser].Apply(amount: 0, type: "UreaN")
                  1993-11-01  [Fertiliser].Apply(amount: 0, type: "UreaN")
                  1993-12-01  [Fertiliser].Apply(amount: 0, type: "UreaN")
                  1994-01-01  [Fertiliser].Apply(amount: 0, type: "UreaN")
                  1994-02-01  [Fertiliser].Apply(amount: 0, type: "UreaN")
                  1994-03-01  [Fertiliser].Apply(amount: 0, type: "UreaN")
                  1994-04-01  [Fertiliser].Apply(amount: 0, type: "UreaN")
                  1994-05-01  [Fertiliser].Apply(amount: 0, type: "UreaN")
                  1994-06-01  [Fertiliser].Apply(amount: 0, type: "UreaN")
                  1994-07-01  [Fertiliser].Apply(amount: 0, type: "UreaN")
                  1994-08-01  [Fertiliser].Apply(amount: 0, type: "UreaN")
                  1994-09-01  [Fertiliser].Apply(amount: 0, type: "UreaN")
                  1994-10-01  [Fertiliser].Apply(amount: 0, type: "UreaN")
                  1994-11-01  [Fertiliser].Apply(amount: 0, type: "UreaN")
                  1994-12-01  [Fertiliser].Apply(amount: 0, type: "UreaN")
                Operations Nitrogen25
                  1991-04-01  [Fertiliser].Apply(amount: 25, type: "UreaN")
                  1991-05-01  [Fertiliser].Apply(amount: 25, type: "UreaN")
                  1991-06-01  [Fertiliser].Apply(amount: 25, type: "UreaN")
                  1991-07-01  [Fertiliser].Apply(amount: 25, type: "UreaN")
                  1991-08-01  [Fertiliser].Apply(amount: 25, type: "UreaN")
                  1991-09-01  [Fertiliser].Apply(amount: 25, type: "UreaN")
                  1991-10-01  [Fertiliser].Apply(amount: 25, type: "UreaN")
                  1991-11-01  [Fertiliser].Apply(amount: 25, type: "UreaN")
                  1991-12-01  [Fertiliser].Apply(amount: 25, type: "UreaN")
                  1992-01-01  [Fertiliser].Apply(amount: 25, type: "UreaN")
                  1992-02-01  [Fertiliser].Apply(amount: 25, type: "UreaN")
                  1992-03-01  [Fertiliser].Apply(amount: 25, type: "UreaN")
                  1992-04-01  [Fertiliser].Apply(amount: 25, type: "UreaN")
                  1992-05-01  [Fertiliser].Apply(amount: 25, type: "UreaN")
                  1992-06-01  [Fertiliser].Apply(amount: 25, type: "UreaN")
                  1992-07-01  [Fertiliser].Apply(amount: 25, type: "UreaN")
                  1992-08-01  [Fertiliser].Apply(amount: 25, type: "UreaN")
                  1992-09-01  [Fertiliser].Apply(amount: 25, type: "UreaN")
                  1992-10-01  [Fertiliser].Apply(amount: 25, type: "UreaN")
                  1992-11-01  [Fertiliser].Apply(amount: 25, type: "UreaN")
                  1992-12-01  [Fertiliser].Apply(amount: 25, type: "UreaN")
                  1993-01-01  [Fertiliser].Apply(amount: 25, type: "UreaN")
                  1993-02-01  [Fertiliser].Apply(amount: 25, type: "UreaN")
                  1993-03-01  [Fertiliser].Apply(amount: 25, type: "UreaN")
                  1993-04-01  [Fertiliser].Apply(amount: 25, type: "UreaN")
                  1993-05-01  [Fertiliser].Apply(amount: 25, type: "UreaN")
                  1993-06-01  [Fertiliser].Apply(amount: 25, type: "UreaN")
                  1993-07-01  [Fertiliser].Apply(amount: 25, type: "UreaN")
                  1993-08-01  [Fertiliser].Apply(amount: 25, type: "UreaN")
                  1993-09-01  [Fertiliser].Apply(amount: 25, type: "UreaN")
                  1993-10-01  [Fertiliser].Apply(amount: 25, type: "UreaN")
                  1993-11-01  [Fertiliser].Apply(amount: 25, type: "UreaN")
                  1993-12-01  [Fertiliser].Apply(amount: 25, type: "UreaN")
                  1994-01-01  [Fertiliser].Apply(amount: 25, type: "UreaN")
                  1994-02-01  [Fertiliser].Apply(amount: 25, type: "UreaN")
                  1994-03-01  [Fertiliser].Apply(amount: 25, type: "UreaN")
                  1994-04-01  [Fertiliser].Apply(amount: 25, type: "UreaN")
                  1994-05-01  [Fertiliser].Apply(amount: 25, type: "UreaN")
                  1994-06-01  [Fertiliser].Apply(amount: 25, type: "UreaN")
                  1994-07-01  [Fertiliser].Apply(amount: 25, type: "UreaN")
                  1994-08-01  [Fertiliser].Apply(amount: 25, type: "UreaN")
                  1994-09-01  [Fertiliser].Apply(amount: 25, type: "UreaN")
                  1994-10-01  [Fertiliser].Apply(amount: 25, type: "UreaN")
                  1994-11-01  [Fertiliser].Apply(amount: 25, type: "UreaN")
                  1994-12-01  [Fertiliser].Apply(amount: 25, type: "UreaN")
                Operations Nitrogen375
                  1991-04-01  [Fertiliser].Apply(amount: 37.5, type: "UreaN")
                  1991-05-01  [Fertiliser].Apply(amount: 37.5, type: "UreaN")
                  1991-06-01  [Fertiliser].Apply(amount: 37.5, type: "UreaN")
                  1991-07-01  [Fertiliser].Apply(amount: 37.5, type: "UreaN")
                  1991-08-01  [Fertiliser].Apply(amount: 37.5, type: "UreaN")
                  1991-09-01  [Fertiliser].Apply(amount: 37.5, type: "UreaN")
                  1991-10-01  [Fertiliser].Apply(amount: 37.5, type: "UreaN")
                  1991-11-01  [Fertiliser].Apply(amount: 37.5, type: "UreaN")
                  1991-12-01  [Fertiliser].Apply(amount: 37.5, type: "UreaN")
                  1992-01-01  [Fertiliser].Apply(amount: 37.5, type: "UreaN")
                  1992-02-01  [Fertiliser].Apply(amount: 37.5, type: "UreaN")
                  1992-03-01  [Fertiliser].Apply(amount: 37.5, type: "UreaN")
                  1992-04-01  [Fertiliser].Apply(amount: 37.5, type: "UreaN")
                  1992-05-01  [Fertiliser].Apply(amount: 37.5, type: "UreaN")
                  1992-06-01  [Fertiliser].Apply(amount: 37.5, type: "UreaN")
                  1992-07-01  [Fertiliser].Apply(amount: 37.5, type: "UreaN")
                  1992-08-01  [Fertiliser].Apply(amount: 37.5, type: "UreaN")
                  1992-09-01  [Fertiliser].Apply(amount: 37.5, type: "UreaN")
                  1992-10-01  [Fertiliser].Apply(amount: 37.5, type: "UreaN")
                  1992-11-01  [Fertiliser].Apply(amount: 37.5, type: "UreaN")
                  1992-12-01  [Fertiliser].Apply(amount: 37.5, type: "UreaN")
                  1993-01-01  [Fertiliser].Apply(amount: 37.5, type: "UreaN")
                  1993-02-01  [Fertiliser].Apply(amount: 37.5, type: "UreaN")
                  1993-03-01  [Fertiliser].Apply(amount: 37.5, type: "UreaN")
                  1993-04-01  [Fertiliser].Apply(amount: 37.5, type: "UreaN")
                  1993-05-01  [Fertiliser].Apply(amount: 37.5, type: "UreaN")
                  1993-06-01  [Fertiliser].Apply(amount: 37.5, type: "UreaN")
                  1993-07-01  [Fertiliser].Apply(amount: 37.5, type: "UreaN")
                  1993-08-01  [Fertiliser].Apply(amount: 37.5, type: "UreaN")
                  1993-09-01  [Fertiliser].Apply(amount: 37.5, type: "UreaN")
                  1993-10-01  [Fertiliser].Apply(amount: 37.5, type: "UreaN")
                  1993-11-01  [Fertiliser].Apply(amount: 37.5, type: "UreaN")
                  1993-12-01  [Fertiliser].Apply(amount: 37.5, type: "UreaN")
                  1994-01-01  [Fertiliser].Apply(amount: 37.5, type: "UreaN")
                  1994-02-01  [Fertiliser].Apply(amount: 37.5, type: "UreaN")
                  1994-03-01  [Fertiliser].Apply(amount: 37.5, type: "UreaN")
                  1994-04-01  [Fertiliser].Apply(amount: 37.5, type: "UreaN")
                  1994-05-01  [Fertiliser].Apply(amount: 37.5, type: "UreaN")
                  1994-06-01  [Fertiliser].Apply(amount: 37.5, type: "UreaN")
                  1994-07-01  [Fertiliser].Apply(amount: 37.5, type: "UreaN")
                  1994-08-01  [Fertiliser].Apply(amount: 37.5, type: "UreaN")
                  1994-09-01  [Fertiliser].Apply(amount: 37.5, type: "UreaN")
                  1994-10-01  [Fertiliser].Apply(amount: 37.5, type: "UreaN")
                  1994-11-01  [Fertiliser].Apply(amount: 37.5, type: "UreaN")
                  1994-12-01  [Fertiliser].Apply(amount: 37.5, type: "UreaN")
                Operations Nitrogen50
                  1991-04-01  [Fertiliser].Apply(amount: 50, type: "UreaN")
                  1991-05-01  [Fertiliser].Apply(amount: 50, type: "UreaN")
                  1991-06-01  [Fertiliser].Apply(amount: 50, type: "UreaN")
                  1991-07-01  [Fertiliser].Apply(amount: 50, type: "UreaN")
                  1991-08-01  [Fertiliser].Apply(amount: 50, type: "UreaN")
                  1991-09-01  [Fertiliser].Apply(amount: 50, type: "UreaN")
                  1991-10-01  [Fertiliser].Apply(amount: 50, type: "UreaN")
                  1991-11-01  [Fertiliser].Apply(amount: 50, type: "UreaN")
                  1991-12-01  [Fertiliser].Apply(amount: 50, type: "UreaN")
                  1992-01-01  [Fertiliser].Apply(amount: 50, type: "UreaN")
                  1992-02-01  [Fertiliser].Apply(amount: 50, type: "UreaN")
                  1992-03-01  [Fertiliser].Apply(amount: 50, type: "UreaN")
                  1992-04-01  [Fertiliser].Apply(amount: 50, type: "UreaN")
                  1992-05-01  [Fertiliser].Apply(amount: 50, type: "UreaN")
                  1992-06-01  [Fertiliser].Apply(amount: 50, type: "UreaN")
                  1992-07-01  [Fertiliser].Apply(amount: 50, type: "UreaN")
                  1992-08-01  [Fertiliser].Apply(amount: 50, type: "UreaN")
                  1992-09-01  [Fertiliser].Apply(amount: 50, type: "UreaN")
                  1992-10-01  [Fertiliser].Apply(amount: 50, type: "UreaN")
                  1992-11-01  [Fertiliser].Apply(amount: 50, type: "UreaN")
                  1992-12-01  [Fertiliser].Apply(amount: 50, type: "UreaN")
                  1993-01-01  [Fertiliser].Apply(amount: 50, type: "UreaN")
                  1993-02-01  [Fertiliser].Apply(amount: 50, type: "UreaN")
                  1993-03-01  [Fertiliser].Apply(amount: 50, type: "UreaN")
                  1993-04-01  [Fertiliser].Apply(amount: 50, type: "UreaN")
                  1993-05-01  [Fertiliser].Apply(amount: 50, type: "UreaN")
                  1993-06-01  [Fertiliser].Apply(amount: 50, type: "UreaN")
                  1993-07-01  [Fertiliser].Apply(amount: 50, type: "UreaN")
                  1993-08-01  [Fertiliser].Apply(amount: 50, type: "UreaN")
                  1993-09-01  [Fertiliser].Apply(amount: 50, type: "UreaN")
                  1993-10-01  [Fertiliser].Apply(amount: 50, type: "UreaN")
                  1993-11-01  [Fertiliser].Apply(amount: 50, type: "UreaN")
                  1993-12-01  [Fertiliser].Apply(amount: 50, type: "UreaN")
                  1994-01-01  [Fertiliser].Apply(amount: 50, type: "UreaN")
                  1994-02-01  [Fertiliser].Apply(amount: 50, type: "UreaN")
                  1994-03-01  [Fertiliser].Apply(amount: 50, type: "UreaN")
                  1994-04-01  [Fertiliser].Apply(amount: 50, type: "UreaN")
                  1994-05-01  [Fertiliser].Apply(amount: 50, type: "UreaN")
                  1994-06-01  [Fertiliser].Apply(amount: 50, type: "UreaN")
                  1994-07-01  [Fertiliser].Apply(amount: 50, type: "UreaN")
                  1994-08-01  [Fertiliser].Apply(amount: 50, type: "UreaN")
                  1994-09-01  [Fertiliser].Apply(amount: 50, type: "UreaN")
                  1994-10-01  [Fertiliser].Apply(amount: 50, type: "UreaN")
                  1994-11-01  [Fertiliser].Apply(amount: 50, type: "UreaN")
                  1994-12-01  [Fertiliser].Apply(amount: 50, type: "UreaN")
                Operations Nitrogen75
                  1991-04-01  [Fertiliser].Apply(amount: 75, type: "UreaN")
                  1991-05-01  [Fertiliser].Apply(amount: 75, type: "UreaN")
                  1991-06-01  [Fertiliser].Apply(amount: 75, type: "UreaN")
                  1991-07-01  [Fertiliser].Apply(amount: 75, type: "UreaN")
                  1991-08-01  [Fertiliser].Apply(amount: 75, type: "UreaN")
                  1991-09-01  [Fertiliser].Apply(amount: 75, type: "UreaN")
                  1991-10-01  [Fertiliser].Apply(amount: 75, type: "UreaN")
                  1991-11-01  [Fertiliser].Apply(amount: 75, type: "UreaN")
                  1991-12-01  [Fertiliser].Apply(amount: 75, type: "UreaN")
                  1992-01-01  [Fertiliser].Apply(amount: 75, type: "UreaN")
                  1992-02-01  [Fertiliser].Apply(amount: 75, type: "UreaN")
                  1992-03-01  [Fertiliser].Apply(amount: 75, type: "UreaN")
                  1992-04-01  [Fertiliser].Apply(amount: 75, type: "UreaN")
                  1992-05-01  [Fertiliser].Apply(amount: 75, type: "UreaN")
                  1992-06-01  [Fertiliser].Apply(amount: 75, type: "UreaN")
                  1992-07-01  [Fertiliser].Apply(amount: 75, type: "UreaN")
                  1992-08-01  [Fertiliser].Apply(amount: 75, type: "UreaN")
                  1992-09-01  [Fertiliser].Apply(amount: 75, type: "UreaN")
                  1992-10-01  [Fertiliser].Apply(amount: 75, type: "UreaN")
                  1992-11-01  [Fertiliser].Apply(amount: 75, type: "UreaN")
                  1992-12-01  [Fertiliser].Apply(amount: 75, type: "UreaN")
                  1993-01-01  [Fertiliser].Apply(amount: 75, type: "UreaN")
                  1993-02-01  [Fertiliser].Apply(amount: 75, type: "UreaN")
                  1993-03-01  [Fertiliser].Apply(amount: 75, type: "UreaN")
                  1993-04-01  [Fertiliser].Apply(amount: 75, type: "UreaN")
                  1993-05-01  [Fertiliser].Apply(amount: 75, type: "UreaN")
                  1993-06-01  [Fertiliser].Apply(amount: 75, type: "UreaN")
                  1993-07-01  [Fertiliser].Apply(amount: 75, type: "UreaN")
                  1993-08-01  [Fertiliser].Apply(amount: 75, type: "UreaN")
                  1993-09-01  [Fertiliser].Apply(amount: 75, type: "UreaN")
                  1993-10-01  [Fertiliser].Apply(amount: 75, type: "UreaN")
                  1993-11-01  [Fertiliser].Apply(amount: 75, type: "UreaN")
                  1993-12-01  [Fertiliser].Apply(amount: 75, type: "UreaN")
                  1994-01-01  [Fertiliser].Apply(amount: 75, type: "UreaN")
                  1994-02-01  [Fertiliser].Apply(amount: 75, type: "UreaN")
                  1994-03-01  [Fertiliser].Apply(amount: 75, type: "UreaN")
                  1994-04-01  [Fertiliser].Apply(amount: 75, type: "UreaN")
                  1994-05-01  [Fertiliser].Apply(amount: 75, type: "UreaN")
                  1994-06-01  [Fertiliser].Apply(amount: 75, type: "UreaN")
                  1994-07-01  [Fertiliser].Apply(amount: 75, type: "UreaN")
                  1994-08-01  [Fertiliser].Apply(amount: 75, type: "UreaN")
                  1994-09-01  [Fertiliser].Apply(amount: 75, type: "UreaN")
                  1994-10-01  [Fertiliser].Apply(amount: 75, type: "UreaN")
                  1994-11-01  [Fertiliser].Apply(amount: 75, type: "UreaN")
                  1994-12-01  [Fertiliser].Apply(amount: 75, type: "UreaN")
                Operations Nitrogen100
                  1991-04-01  [Fertiliser].Apply(amount: 100, type: "UreaN")
                  1991-05-01  [Fertiliser].Apply(amount: 100, type: "UreaN")
                  1991-06-01  [Fertiliser].Apply(amount: 100, type: "UreaN")
                  1991-07-01  [Fertiliser].Apply(amount: 100, type: "UreaN")
                  1991-08-01  [Fertiliser].Apply(amount: 100, type: "UreaN")
                  1991-09-01  [Fertiliser].Apply(amount: 100, type: "UreaN")
                  1991-10-01  [Fertiliser].Apply(amount: 100, type: "UreaN")
                  1991-11-01  [Fertiliser].Apply(amount: 100, type: "UreaN")
                  1991-12-01  [Fertiliser].Apply(amount: 100, type: "UreaN")
                  1992-01-01  [Fertiliser].Apply(amount: 100, type: "UreaN")
                  1992-02-01  [Fertiliser].Apply(amount: 100, type: "UreaN")
                  1992-03-01  [Fertiliser].Apply(amount: 100, type: "UreaN")
                  1992-04-01  [Fertiliser].Apply(amount: 100, type: "UreaN")
                  1992-05-01  [Fertiliser].Apply(amount: 100, type: "UreaN")
                  1992-06-01  [Fertiliser].Apply(amount: 100, type: "UreaN")
                  1992-07-01  [Fertiliser].Apply(amount: 100, type: "UreaN")
                  1992-08-01  [Fertiliser].Apply(amount: 100, type: "UreaN")
                  1992-09-01  [Fertiliser].Apply(amount: 100, type: "UreaN")
                  1992-10-01  [Fertiliser].Apply(amount: 100, type: "UreaN")
                  1992-11-01  [Fertiliser].Apply(amount: 100, type: "UreaN")
                  1992-12-01  [Fertiliser].Apply(amount: 100, type: "UreaN")
                  1993-01-01  [Fertiliser].Apply(amount: 100, type: "UreaN")
                  1993-02-01  [Fertiliser].Apply(amount: 100, type: "UreaN")
                  1993-03-01  [Fertiliser].Apply(amount: 100, type: "UreaN")
                  1993-04-01  [Fertiliser].Apply(amount: 100, type: "UreaN")
                  1993-05-01  [Fertiliser].Apply(amount: 100, type: "UreaN")
                  1993-06-01  [Fertiliser].Apply(amount: 100, type: "UreaN")
                  1993-07-01  [Fertiliser].Apply(amount: 100, type: "UreaN")
                  1993-08-01  [Fertiliser].Apply(amount: 100, type: "UreaN")
                  1993-09-01  [Fertiliser].Apply(amount: 100, type: "UreaN")
                  1993-10-01  [Fertiliser].Apply(amount: 100, type: "UreaN")
                  1993-11-01  [Fertiliser].Apply(amount: 100, type: "UreaN")
                  1993-12-01  [Fertiliser].Apply(amount: 100, type: "UreaN")
                  1994-01-01  [Fertiliser].Apply(amount: 100, type: "UreaN")
                  1994-02-01  [Fertiliser].Apply(amount: 100, type: "UreaN")
                  1994-03-01  [Fertiliser].Apply(amount: 100, type: "UreaN")
                  1994-04-01  [Fertiliser].Apply(amount: 100, type: "UreaN")
                  1994-05-01  [Fertiliser].Apply(amount: 100, type: "UreaN")
                  1994-06-01  [Fertiliser].Apply(amount: 100, type: "UreaN")
                  1994-07-01  [Fertiliser].Apply(amount: 100, type: "UreaN")
                  1994-08-01  [Fertiliser].Apply(amount: 100, type: "UreaN")
                  1994-09-01  [Fertiliser].Apply(amount: 100, type: "UreaN")
                  1994-10-01  [Fertiliser].Apply(amount: 100, type: "UreaN")
                  1994-11-01  [Fertiliser].Apply(amount: 100, type: "UreaN")
                  1994-12-01  [Fertiliser].Apply(amount: 100, type: "UreaN")
                Operations Nitrogen150
                  1991-04-01  [Fertiliser].Apply(amount: 150, type: "UreaN")
                  1991-05-01  [Fertiliser].Apply(amount: 150, type: "UreaN")
                  1991-06-01  [Fertiliser].Apply(amount: 150, type: "UreaN")
                  1991-07-01  [Fertiliser].Apply(amount: 150, type: "UreaN")
                  1991-08-01  [Fertiliser].Apply(amount: 150, type: "UreaN")
                  1991-09-01  [Fertiliser].Apply(amount: 150, type: "UreaN")
                  1991-10-01  [Fertiliser].Apply(amount: 150, type: "UreaN")
                  1991-11-01  [Fertiliser].Apply(amount: 150, type: "UreaN")
                  1991-12-01  [Fertiliser].Apply(amount: 150, type: "UreaN")
                  1992-01-01  [Fertiliser].Apply(amount: 150, type: "UreaN")
                  1992-02-01  [Fertiliser].Apply(amount: 150, type: "UreaN")
                  1992-03-01  [Fertiliser].Apply(amount: 150, type: "UreaN")
                  1992-04-01  [Fertiliser].Apply(amount: 150, type: "UreaN")
                  1992-05-01  [Fertiliser].Apply(amount: 150, type: "UreaN")
                  1992-06-01  [Fertiliser].Apply(amount: 150, type: "UreaN")
                  1992-07-01  [Fertiliser].Apply(amount: 150, type: "UreaN")
                  1992-08-01  [Fertiliser].Apply(amount: 150, type: "UreaN")
                  1992-09-01  [Fertiliser].Apply(amount: 150, type: "UreaN")
                  1992-10-01  [Fertiliser].Apply(amount: 150, type: "UreaN")
                  1992-11-01  [Fertiliser].Apply(amount: 150, type: "UreaN")
                  1992-12-01  [Fertiliser].Apply(amount: 150, type: "UreaN")
                  1993-01-01  [Fertiliser].Apply(amount: 150, type: "UreaN")
                  1993-02-01  [Fertiliser].Apply(amount: 150, type: "UreaN")
                  1993-03-01  [Fertiliser].Apply(amount: 150, type: "UreaN")
                  1993-04-01  [Fertiliser].Apply(amount: 150, type: "UreaN")
                  1993-05-01  [Fertiliser].Apply(amount: 150, type: "UreaN")
                  1993-06-01  [Fertiliser].Apply(amount: 150, type: "UreaN")
                  1993-07-01  [Fertiliser].Apply(amount: 150, type: "UreaN")
                  1993-08-01  [Fertiliser].Apply(amount: 150, type: "UreaN")
                  1993-09-01  [Fertiliser].Apply(amount: 150, type: "UreaN")
                  1993-10-01  [Fertiliser].Apply(amount: 150, type: "UreaN")
                  1993-11-01  [Fertiliser].Apply(amount: 150, type: "UreaN")
                  1993-12-01  [Fertiliser].Apply(amount: 150, type: "UreaN")
                  1994-01-01  [Fertiliser].Apply(amount: 150, type: "UreaN")
                  1994-02-01  [Fertiliser].Apply(amount: 150, type: "UreaN")
                  1994-03-01  [Fertiliser].Apply(amount: 150, type: "UreaN")
                  1994-04-01  [Fertiliser].Apply(amount: 150, type: "UreaN")
                  1994-05-01  [Fertiliser].Apply(amount: 150, type: "UreaN")
                  1994-06-01  [Fertiliser].Apply(amount: 150, type: "UreaN")
                  1994-07-01  [Fertiliser].Apply(amount: 150, type: "UreaN")
                  1994-08-01  [Fertiliser].Apply(amount: 150, type: "UreaN")
                  1994-09-01  [Fertiliser].Apply(amount: 150, type: "UreaN")
                  1994-10-01  [Fertiliser].Apply(amount: 150, type: "UreaN")
                  1994-11-01  [Fertiliser].Apply(amount: 150, type: "UreaN")
                  1994-12-01  [Fertiliser].Apply(amount: 150, type: "UreaN")
            Simulation KairiBase93
              Clock: Start=1993-01-01; End=1993-12-31
              Weather: FileName=Kairi_-17.20_145.55.met
              Summary summaryfile
              SoilArbitrator Soil Arbitrator
              MicroClimate: a_interception=0; b_interception=1; c_interception=0; d_interception=0; SoilHeatFluxFraction=0.4; MinimumHeightDiffForNewLayer=0; NightInterceptionFraction=0.5; ReferenceHeight=2
              Zone Field: Area=1; Slope=0; AspectAngle=0; Altitude=50
                Operations Management
                  1993-01-01  [AgPRyegrass].Sow(population: 1, cultivar: "W", depth: 5, rowSpacing: 150)
                Irrigation
                Fertiliser
                SurfaceOrganicMatter: InitialResidueName=grass; InitialResidueType=grass; InitialResidueMass=1000; InitialStandingFraction=0; InitialCPR=0; InitialCNR=25
                PastureSpecies AGPRyegrass: same as Validation.Australia.Mutdapilly9294.Mutdapilly9294Base.Field.AgPRyegrass
                Report: EventNames=[Clock].DoReport
                  VariableNames:
                    [Clock].Today
                    [Clock].Today.Year as Year
                    [Irrigation].IrrigationApplied
                    // plant outputs
                    [AgPRyegrass].AboveGroundNConc
                    //[AgPRyegrass].AboveGroundHarvestable.StructuralWt
                    //[AgPRyegrass].AboveGroundHarvestable.wt
                    //Sum([AGPRyegrass].HarvestedWt
                    //[AgPRyegrass].HarvestedWt.wt
                    Sum of [AgPRyegrass].HarvestedWt *0.1 from 1-Jan to 31-Dec as AnnualPastureYield
                    [AgPRyegrass].GlfWaterSupply
                    [AgPRyegrass].GlfNContent
                    [AgPRyegrass].TotalWt
                    //Soil
                    sum([Soil].NO3.kgha)
                    //Fertiliser
                    [Fertiliser].NitrogenApplied
                Manager Irrigated
                  allowIrrigation = True
                  seasonStart = 1-Jan
                  seasonEnd = 31-Dec
                  seasonsAllocation = 10000
                  triggerDeficit = 80
                  targetDeficit = 95
                  returndays = 3
                  maximumAmount = 30
                  depthPAWC = 600
                  script: same as in Validation.Australia.Mutdapilly9294.Factors.Irrigation.Full
                Operations DefoliationSchedule
                  1993-05-01  [AgPRyegrass].RemoveBiomass(amount: 1500, type: "SetResidueAmount")
                  1993-06-01  [AgPRyegrass].RemoveBiomass(amount: 1500, type: "SetResidueAmount")
                  1993-07-01  [AgPRyegrass].RemoveBiomass(amount: 1500, type: "SetResidueAmount")
                  1993-08-01  [AgPRyegrass].RemoveBiomass(amount: 1500, type: "SetResidueAmount")
                  1993-09-01  [AgPRyegrass].RemoveBiomass(amount: 1500, type: "SetResidueAmount")
                  1993-09-22  [AgPRyegrass].RemoveBiomass(amount: 1500, type: "SetResidueAmount")
                  1993-10-13  [AgPRyegrass].RemoveBiomass(amount: 1500, type: "SetResidueAmount")
                  1993-11-03  [AgPRyegrass].RemoveBiomass(amount: 1500, type: "SetResidueAmount")
                  1993-12-02  [AgPRyegrass].RemoveBiomass(amount: 1500, type: "SetResidueAmount")
                Soil: ASCOrder=NA; ASCSubOrder=NA; SoilType=Haplic Ferralsols; Site=NA; NearestTown=NA; Region=NA; State=NA; Country=Australia; NaturalVegetation=NA; ApsoilNumber=9999; Latitude=-17.125; Longitude=145.625; LocationAccuracy=+- 250 m; YearOfSampling=2019; DataSource=ISRIC SoilGrids
                  Water: Thickness=[150, 150, 150, 150, 200, 200, 200, 200, 300, 300]; FilledFromTop=true
                    InitialValues=[0.383, 0.349, 0.337, 0.332, 0.33, 0.33, 0.331, 0.333, 0.335, 0.338]
                  Physical
                    Thickness  ParticleSizeSand  ParticleSizeSilt  ParticleSizeClay  Rocks  BD     AirDry  LL15   DUL    SAT    KS
                    150        47.7              17                35.3              0      0.974  0.083   0.248  0.383  0.568  5.829
                    150        46.5              16.5              37                0      1.174  0.08    0.24   0.349  0.5    4.804
                    150        45.2              16                38.8              0      1.248  0.08    0.24   0.337  0.477  3.921
                    150        43.8              16                40.2              0      1.28   0.08    0.24   0.332  0.473  3.295
                    200        43.2              16.2              40.8              0      1.306  0.08    0.24   0.33   0.468  3.11
                    200        43.8              16.8              40.2              0      1.328  0.08    0.24   0.33   0.463  3.295
                    200        44                17.1              39.9              0      1.34   0.08    0.24   0.331  0.459  3.432
                    200        44                17.3              39.7              0      1.342  0.08    0.24   0.333  0.457  3.512
                    300        44                17.6              39.5              0      1.344  0.08    0.24   0.335  0.455  3.616
                    300        44                17.8              39.1              0      1.347  0.08    0.24   0.338  0.452  3.744
                    Rocks source: Calculated
                    SoilCrop AgPRyegrassSoil
                      LL=[0.248, 0.24, 0.241, 0.248, 0.258, 0.27, 0.282, 0.296, 0.313, 0.334]
                      KL=[0.06, 0.06, 0.06, 0.055, 0.048, 0.04, 0.032, 0.024, 0.014, 0.003]
                      XF=[1, 1, 1, 1, 1, 1, 1, 1, 1, 1]
                  WaterBalance SoilWater: SummerDate=1-nov; SummerU=6; SummerCona=6; WinterDate=1-apr; WinterU=4; WinterCona=2.5; DiffusConst=12110.91; DiffusSlope=-5.3; Salb=0.12; CN2Bare=73; CNRed=20; CNCov=0; DischargeWidth=5; CatchmentArea=10; PSIDul=-100; Thickness=[150, 150, 150, 150, 200, 200, 200, 200, 300, 300]; SWCON=[0.5, 0.5, 0.5, 0.5, 0.5, 0.5, 0.5, 0.5, 0.5, 0.5]
                  Organic: FOMCNRatio=40; CarbonUnits=Total
                    Thickness  Carbon  SoilCNRatio  FBiom  FInert  FOM
                    150        5.403   8.7          0.04   0.37    84.9016
                    150        2.743   8.7          0.031  0.605   67.7953
                    150        2.105   8.7          0.014  0.741   54.1356
                    150        1.753   8.7          0.01   0.868   43.2282
                    200        1.51    8.7          0.01   0.987   32.0242
                    200        1.369   8.7          0.01   0.99    23.7241
                    200        1.29    8.7          0.01   0.99    17.5753
                    200        1.27    8.7          0.01   0.99    13.0201
                    300        1.246   8.7          0.01   0.99    8.30197
                    300        1.216   8.7          0.01   0.99    5.29357
                  Chemical: PHUnits=Water
                    Thickness  PH    CEC
                    150        5.23  24.77775
                    150        5.3   19.16625
                    150        5.33  18.12425
                    150        5.38  17.6123
                    200        5.4   17.1855
                    200        5.4   16.7483
                    200        5.4   16.5038
                    200        5.4   16.4054
                    300        5.4   16.298
                    300        5.4   16.1237
                    CEC source: Calculated
                  Nutrient
                  Solute NO3: Thickness=[150, 150, 150, 150, 200, 200, 200, 200, 300, 300]; InitialValues=[0, 0, 0, 0, 0, 0, 0, 0, 0, 0]; InitialValuesUnits=ppm; WaterTableConcentration=0; D0=0; DepthConstant=0; MaxDepthSoluteAccessible=0; RunoffEffectivenessAtMovingSolute=0; MaxEffectiveRunoff=0
                  Solute NH4: same as Validation.Australia.NitrogenExperiment.KairiNitrogenExperiment.Kairi93.KairiBase93.Field.Soil.NO3
                  Solute Urea: Thickness=[150, 150, 150, 150, 200, 200, 200, 200, 300, 300]; InitialValues=[0, 0, 0, 0, 0, 0, 0, 0, 0, 0]; InitialValuesUnits=kg/ha; WaterTableConcentration=0; D0=0; DepthConstant=0; MaxDepthSoluteAccessible=0; RunoffEffectivenessAtMovingSolute=0; MaxEffectiveRunoff=0
                  SoilTemperature Temperature
                Operations FertilisationSchedule
          Experiment Kairi94
            Factors: same as Validation.Australia.NitrogenExperiment.KairiNitrogenExperiment.Kairi93.Factors
            Simulation KairiBase94
              Clock: Start=1993-12-29; End=1994-12-31
              Weather: FileName=Kairi_-17.20_145.55.met
              Summary summaryfile
              SoilArbitrator Soil Arbitrator
              MicroClimate: a_interception=0; b_interception=1; c_interception=0; d_interception=0; SoilHeatFluxFraction=0.4; MinimumHeightDiffForNewLayer=0; NightInterceptionFraction=0.5; ReferenceHeight=2
              Zone Field: Area=1; Slope=0; AspectAngle=0; Altitude=50
                Operations Management
                  1994-01-01  [AgPRyegrass].Sow(population: 1, cultivar: "W", depth: 5, rowSpacing: 150)
                Irrigation
                Fertiliser
                SurfaceOrganicMatter: InitialResidueName=grass; InitialResidueType=grass; InitialResidueMass=1000; InitialStandingFraction=0; InitialCPR=0; InitialCNR=25
                PastureSpecies AGPRyegrass: same as Validation.Australia.Mutdapilly9294.Mutdapilly9294Base.Field.AgPRyegrass
                Report: EventNames=[Clock].DoReport
                  VariableNames:
                    [Clock].Today
                    [Clock].Today.Year as Year
                    [Irrigation].IrrigationApplied
                    // plant outputs
                    [AgPRyegrass].AboveGroundNConc
                    Sum of [AgPRyegrass].HarvestedWt *0.1 from 1-Jan to 31-Dec as AnnualPastureYield
                    [AgPRyegrass].GlfWaterSupply
                    [AgPRyegrass].GlfNContent
                    [AgPRyegrass].TotalWt
                    //Soil
                    sum([Soil].NO3.kgha)
                    //Fertiliser
                    [Fertiliser].NitrogenApplied
                Manager Irrigated: same as Validation.Australia.Mutdapilly9294.Factors.Irrigation.Full
                Operations DefoliationSchedule
                  1994-05-01  [AgPRyegrass].RemoveBiomass(amount: 200, type: "SetResidueAmount")
                  1994-05-22  [AgPRyegrass].RemoveBiomass(amount: 200, type: "SetResidueAmount")
                  1994-06-12  [AgPRyegrass].RemoveBiomass(amount: 200, type: "SetResidueAmount")
                  1994-06-12  [AgPRyegrass].RemoveBiomass(amount: 200, type: "SetResidueAmount")
                  1994-07-03  [AgPRyegrass].RemoveBiomass(amount: 200, type: "SetResidueAmount")
                  1994-07-24  [AgPRyegrass].RemoveBiomass(amount: 200, type: "SetResidueAmount")
                  1994-08-14  [AgPRyegrass].RemoveBiomass(amount: 200, type: "SetResidueAmount")
                  1994-09-04  [AgPRyegrass].RemoveBiomass(amount: 200, type: "SetResidueAmount")
                  1994-09-25  [AgPRyegrass].RemoveBiomass(amount: 200, type: "SetResidueAmount")
                  1994-10-16  [AgPRyegrass].RemoveBiomass(amount: 200, type: "SetResidueAmount")
                  1994-11-06  [AgPRyegrass].RemoveBiomass(amount: 200, type: "SetResidueAmount")
                  1994-11-27  [AgPRyegrass].RemoveBiomass(amount: 200, type: "SetResidueAmount")
                  1994-12-18  [AgPRyegrass].RemoveBiomass(amount: 200, type: "SetResidueAmount")
                Soil: same as Validation.Australia.NitrogenExperiment.KairiNitrogenExperiment.Kairi93.KairiBase93.Field.Soil
                Operations FertilisationSchedule
          Experiment Kairi91
            Factors: same as Validation.Australia.NitrogenExperiment.KairiNitrogenExperiment.Kairi93.Factors
            Simulation KairiBase91
              Clock: Start=1990-12-29; End=1991-12-31
              Weather: FileName=Kairi_-17.20_145.55.met
              Summary summaryfile
              SoilArbitrator Soil Arbitrator
              MicroClimate: a_interception=0; b_interception=1; c_interception=0; d_interception=0; SoilHeatFluxFraction=0.4; MinimumHeightDiffForNewLayer=0; NightInterceptionFraction=0.5; ReferenceHeight=2
              Zone Field: Area=1; Slope=0; AspectAngle=0; Altitude=50
                Operations Management
                  1991-01-01  [AgPRyegrass].Sow(population: 1, cultivar: "W", depth: 5, rowSpacing: 150)
                Irrigation
                Fertiliser
                SurfaceOrganicMatter: InitialResidueName=grass; InitialResidueType=grass; InitialResidueMass=1000; InitialStandingFraction=0; InitialCPR=0; InitialCNR=25
                PastureSpecies AGPRyegrass: same as Validation.Australia.Mutdapilly9294.Mutdapilly9294Base.Field.AgPRyegrass
                Report: EventNames=[Clock].DoReport
                  VariableNames:
                    [Clock].Today
                    [Clock].Today.Year as Year
                    [Irrigation].IrrigationApplied
                    // plant outputs
                    [AgPRyegrass].AboveGroundNConc
                    //[AgPRyegrass].AboveGroundHarvestable.StructuralWt
                    //[AgPRyegrass].AboveGroundHarvestable.wt
                    //Sum([AGPRyegrass].HarvestedWt
                    //[AgPRyegrass].HarvestedWt.wt
                    Sum of [AgPRyegrass].HarvestedWt *0.1 from 1-Jan to 31-Dec as AnnualPastureYield
                    [AgPRyegrass].GlfWaterSupply
                    [AgPRyegrass].GlfNContent
                    [AgPRyegrass].TotalWt
                    //Soil
                    sum([Soil].NO3.kgha)
                    //Fertiliser
                    [Fertiliser].NitrogenApplied
                    [AgPRyegrass].HarvestedME
                Manager Irrigated: same as Validation.Australia.Mutdapilly9294.Factors.Irrigation.Full
                Operations DefoliationSchedule
                  1991-05-01  [AgPRyegrass].RemoveBiomass(amount: 200, type: "SetResidueAmount")
                  1991-06-01  [AgPRyegrass].RemoveBiomass(amount: 200, type: "SetResidueAmount")
                  1991-07-01  [AgPRyegrass].RemoveBiomass(amount: 200, type: "SetResidueAmount")
                  1991-08-01  [AgPRyegrass].RemoveBiomass(amount: 200, type: "SetResidueAmount")
                  1991-09-01  [AgPRyegrass].RemoveBiomass(amount: 200, type: "SetResidueAmount")
                  1991-10-01  [AgPRyegrass].RemoveBiomass(amount: 200, type: "SetResidueAmount")
                  1991-11-01  [AgPRyegrass].RemoveBiomass(amount: 200, type: "SetResidueAmount")
                Soil: same as Validation.Australia.NitrogenExperiment.KairiNitrogenExperiment.Kairi93.KairiBase93.Field.Soil
                Operations FertilisationSchedule
        Folder MutdapillyNitrogenExperiment
          Documentation MutdapillyNitrogenExperiment
            ## **Comparative productivity of irrigated short-term ryegrass (Lolium multiflorum) pasture receiving nitrogen, grown alone or in a mixture with white (Trifolium repens) and Persian (T. resupinatum) clovers**<h3>

            This folder consists of 3 experiments conducted across 3 years. The simulations in these experiments aim to replicate the experiment conducted by [#Lowe_Fulkerson_Walker] under the following conditions:
            1. Location: Subtropical alluvial systems of the Bremer at Mutdapilly in Southeast Queensland
            2. Seedbed: All experiments were sown in late March or early April by broadcasting seed onto the surface and rolling before irrgation
            3. Irrigation: Irrigation of 12 mm was applied to the experiments every 5 days for first 4 weeks with 25mm applied every 14 days subsequently
            4. Defoliation: After initial period of about 6 weeks all experiment plots were defoliated with reciprocating balde mower or rotary mower to 5cm above ground.
            5. Defoliation Frequency: Defoliation was done 4 weekly basis in 1991 and from June to August 1993
            6. Fertilizers Nitrogen (Urea) applied: 0, 25, 37.5, 50, 75, 100, 150
            5. Species: Lolium multiflorum
            6. Duration: 1991, 1993, 1994

            **Simulation Parameters:**
            1. Model used: AGPRyegrass
            2. Duration: 1991, 1993, 1994
            3. Sowing Date: 01-01-1991, 01-01-1993, 01-01-1994
            4. Irrigation: Fully irrigated. Used manager script
            5. Fertiliser Operations: Used Opertions to match the schedule in [#Lowe_Fulkerson_Walker].
            6. Defoliation schedule: Used operations to match the schedule in [#Lowe_Fulkerson_Walker].
            6. Experiment factors: Fertilisation applied
            7. Report variables: AboveGroundHarvestable Weight, NConc,Nitrogen stress, Water Stress, Irrigation
          Experiment Mutdapilly93
            Factors: same as Validation.Australia.NitrogenExperiment.KairiNitrogenExperiment.Kairi93.Factors
            Simulation Mutdapillybase93
              Clock: Start=1992-12-29; End=1993-12-31
              Weather: FileName=Mutdapilly9194.met
              Summary summaryfile
              SoilArbitrator Soil Arbitrator
              MicroClimate: a_interception=0; b_interception=1; c_interception=0; d_interception=0; SoilHeatFluxFraction=0.4; MinimumHeightDiffForNewLayer=0; NightInterceptionFraction=0.5; ReferenceHeight=2
              Zone Field: Area=1; Slope=0; AspectAngle=0; Altitude=50
                Operations Management
                  1993-01-01  [AgPRyegrass].Sow(population: 1, cultivar: "W", depth: 5, rowSpacing: 150)
                Irrigation
                Fertiliser
                SurfaceOrganicMatter: InitialResidueName=grass; InitialResidueType=grass; InitialResidueMass=1000; InitialStandingFraction=0; InitialCPR=0; InitialCNR=25
                PastureSpecies AGPRyegrass: same as Validation.Australia.Mutdapilly9294.Mutdapilly9294Base.Field.AgPRyegrass
                Report: EventNames=[Clock].DoReport
                  VariableNames:
                    [Clock].Today
                    [Clock].Today.Year as Year
                    [Irrigation].IrrigationApplied
                    // plant outputs
                    [AgPRyegrass].AboveGroundNConc
                    //[AgPRyegrass].AboveGroundHarvestable.StructuralWt
                    //[AgPRyegrass].AboveGroundHarvestable.wt
                    //Sum([AGPRyegrass].HarvestedWt
                    //[AgPRyegrass].HarvestedWt.wt
                    Sum of [AgPRyegrass].HarvestedWt *0.1 from 1-Jan to 31-Dec as AnnualPastureYield
                    [AgPRyegrass].GlfWaterSupply
                    [AgPRyegrass].GlfNContent
                    [AgPRyegrass].TotalWt
                    //Soil
                    sum([Soil].NO3.kgha)
                    //Fertiliser
                    [Fertiliser].NitrogenApplied
                Manager Irrigated: same as Validation.Australia.Mutdapilly9294.Factors.Irrigation.Full
                Operations DefoliationSchedule
                  1993-05-01  [AgPRyegrass].RemoveBiomass(amount: 200, type: "SetResidueAmount")
                  1993-06-01  [AgPRyegrass].RemoveBiomass(amount: 200, type: "SetResidueAmount")
                  1993-07-01  [AgPRyegrass].RemoveBiomass(amount: 200, type: "SetResidueAmount")
                  1993-08-01  [AgPRyegrass].RemoveBiomass(amount: 200, type: "SetResidueAmount")
                  1993-09-01  [AgPRyegrass].RemoveBiomass(amount: 200, type: "SetResidueAmount")
                  1993-09-22  [AgPRyegrass].RemoveBiomass(amount: 200, type: "SetResidueAmount")
                  1993-10-13  [AgPRyegrass].RemoveBiomass(amount: 200, type: "SetResidueAmount")
                  1993-11-03  [AgPRyegrass].RemoveBiomass(amount: 200, type: "SetResidueAmount")
                  1993-12-02  [AgPRyegrass].RemoveBiomass(amount: 200, type: "SetResidueAmount")
                Soil: same as Validation.Australia.NitrogenExperiment.KairiNitrogenExperiment.Kairi93.KairiBase93.Field.Soil
                Operations FertilisationSchedule
                Report Report1: same as Validation.Australia.NitrogenExperiment.MutdapillyNitrogenExperiment.Mutdapilly93.Mutdapillybase93.Field.Report
          Experiment Mutdapilly94
            Factors: same as Validation.Australia.NitrogenExperiment.KairiNitrogenExperiment.Kairi93.Factors
            Simulation MutdapillyBase94
              Clock: Start=1993-12-29; End=1994-12-31
              Weather: FileName=Mutdapilly9194.met
              Summary summaryfile
              SoilArbitrator Soil Arbitrator
              MicroClimate: a_interception=0; b_interception=1; c_interception=0; d_interception=0; SoilHeatFluxFraction=0.4; MinimumHeightDiffForNewLayer=0; NightInterceptionFraction=0.5; ReferenceHeight=2
              Zone Field: Area=1; Slope=0; AspectAngle=0; Altitude=50
                Operations Management
                  1994-01-01  [AgPRyegrass].Sow(population: 1, cultivar: "W", depth: 5, rowSpacing: 150)
                Irrigation
                Fertiliser
                SurfaceOrganicMatter: InitialResidueName=grass; InitialResidueType=grass; InitialResidueMass=1000; InitialStandingFraction=0; InitialCPR=0; InitialCNR=25
                PastureSpecies AGPRyegrass: same as Validation.Australia.Mutdapilly9294.Mutdapilly9294Base.Field.AgPRyegrass
                Manager Irrigated: same as Validation.Australia.Mutdapilly9294.Factors.Irrigation.Full
                Operations DefoliationSchedule: same as Validation.Australia.NitrogenExperiment.KairiNitrogenExperiment.Kairi94.KairiBase94.Field.DefoliationSchedule
                Soil: same as Validation.Australia.NitrogenExperiment.KairiNitrogenExperiment.Kairi93.KairiBase93.Field.Soil
                Report: same as Validation.Australia.NitrogenExperiment.MutdapillyNitrogenExperiment.Mutdapilly93.Mutdapillybase93.Field.Report
                Operations FertilisationSchedule
          Experiment Mutdapilly91
            Factors: same as Validation.Australia.NitrogenExperiment.KairiNitrogenExperiment.Kairi93.Factors
            Simulation MutdapillyBase91
              Clock: Start=1990-12-29; End=1991-12-31
              Weather: FileName=Mutdapilly9194.met
              Summary summaryfile
              SoilArbitrator Soil Arbitrator
              MicroClimate: a_interception=0; b_interception=1; c_interception=0; d_interception=0; SoilHeatFluxFraction=0.4; MinimumHeightDiffForNewLayer=0; NightInterceptionFraction=0.5; ReferenceHeight=2
              Zone Field: Area=1; Slope=0; AspectAngle=0; Altitude=50
                Operations Management: same as Validation.Australia.NitrogenExperiment.KairiNitrogenExperiment.Kairi91.KairiBase91.Field.Management
                Irrigation
                Fertiliser
                SurfaceOrganicMatter: InitialResidueName=grass; InitialResidueType=grass; InitialResidueMass=1000; InitialStandingFraction=0; InitialCPR=0; InitialCNR=25
                PastureSpecies AGPRyegrass: same as Validation.Australia.Mutdapilly9294.Mutdapilly9294Base.Field.AgPRyegrass
                Report: same as Validation.Australia.NitrogenExperiment.MutdapillyNitrogenExperiment.Mutdapilly93.Mutdapillybase93.Field.Report
                Manager Irrigated: same as Validation.Australia.Mutdapilly9294.Factors.Irrigation.Full
                Operations DefoliationSchedule: same as Validation.Australia.NitrogenExperiment.KairiNitrogenExperiment.Kairi91.KairiBase91.Field.DefoliationSchedule
                Soil: same as Validation.Australia.NitrogenExperiment.KairiNitrogenExperiment.Kairi93.KairiBase93.Field.Soil
                Operations FertilisationSchedule
        Folder CasinoNitrogenExperiment
          Documentation CasinoNitrogenExperiment
            ## **Comparative productivity of irrigated short-term ryegrass (Lolium multiflorum) pasture receiving nitrogen, grown alone or in a mixture with white (Trifolium repens) and Persian (T. resupinatum) clovers**<h3>

            This folder consists of 3 experiments conducted across 3 years. The simulations in these experiments aim to replicate the experiment conducted by [#Lowe_Fulkerson_Walker] under the following conditions:
            1. Location: Richmond Casino in northern NSW.
            2. Seedbed: All experiments were sown in late March or early April by broadcasting seed onto the surface and rolling before irrgation
            3. Irrigation: Irrigation of 12 mm was applied to the experiments every 5 days for first 4 weeks with 25mm applied every 14 days subsequently
            4. Defoliation: After initial period of about 6 weeks all experiment plots were defoliated with reciprocating balde mower or rotary mower to 5cm above ground.
            5. Defoliation Frequency: Defoliation was done 4 weekly basis in 1991 and from June to August 1993
            6. Fertilizers Nitrogen (Urea) applied: 0, 25, 37.5, 50, 75, 100, 150
            5. Species: Lolium multiflorum
            6. Duration: 1991, 1993, 1994

            **Simulation Parameters:**
            1. Model used: AGPRyegrass
            2. Duration: 1991, 1993, 1994
            3. Sowing Date: 01-01-1991, 01-01-1993, 01-01-1994
            4. Irrigation: Fully irrigated. Used manager script
            5. Fertiliser Operations: Used Opertions to match the schedule in [#Lowe_Fulkerson_Walker].
            6. Defoliation schedule: Used operations to match the schedule in [#Lowe_Fulkerson_Walker].
            6. Experiment factors: Fertilisation applied
            7. Report variables: AboveGroundHarvestable Weight, NConc,Nitrogen stress, Water Stress, Irrigation
          Experiment Casino93
            Factors: same as Validation.Australia.NitrogenExperiment.KairiNitrogenExperiment.Kairi93.Factors
            Simulation CasinoBase93
              Clock: Start=1992-12-29; End=1993-12-31
              Weather: FileName=Casino_-28.40_153.00.met
              Summary summaryfile
              SoilArbitrator Soil Arbitrator
              MicroClimate: a_interception=0; b_interception=1; c_interception=0; d_interception=0; SoilHeatFluxFraction=0.4; MinimumHeightDiffForNewLayer=0; NightInterceptionFraction=0.5; ReferenceHeight=2
              Zone Field: Area=1; Slope=0; AspectAngle=0; Altitude=50
                Operations Management
                  1993-01-01  [AgPRyegrass].Sow(population: 1, cultivar: "W", depth: 5, rowSpacing: 150)
                Irrigation
                Fertiliser
                SurfaceOrganicMatter: InitialResidueName=grass; InitialResidueType=grass; InitialResidueMass=1000; InitialStandingFraction=0; InitialCPR=0; InitialCNR=25
                PastureSpecies AGPRyegrass: same as Validation.Australia.Mutdapilly9294.Mutdapilly9294Base.Field.AgPRyegrass
                Report: same as Validation.Australia.NitrogenExperiment.MutdapillyNitrogenExperiment.Mutdapilly93.Mutdapillybase93.Field.Report
                Manager Irrigated: same as Validation.Australia.Mutdapilly9294.Factors.Irrigation.Full
                Operations DefoliationSchedule: same as Validation.Australia.NitrogenExperiment.MutdapillyNitrogenExperiment.Mutdapilly93.Mutdapillybase93.Field.DefoliationSchedule
                Soil: same as Validation.Australia.NitrogenExperiment.KairiNitrogenExperiment.Kairi93.KairiBase93.Field.Soil
                Operations FertilisationSchedule
          Experiment Casino94
            Factors
              Factor Fertiliser: Specification=[Irrigated]
                Operations Nitrogen0: same as Validation.Australia.NitrogenExperiment.KairiNitrogenExperiment.Kairi93.Factors.Fertiliser.Nitrogen0
                Operations Nitrogen25: same as Validation.Australia.NitrogenExperiment.KairiNitrogenExperiment.Kairi93.Factors.Fertiliser.Nitrogen25
                Operations Nitrogen375: same as Validation.Australia.NitrogenExperiment.KairiNitrogenExperiment.Kairi93.Factors.Fertiliser.Nitrogen375
                Operations Nitrogen50: same as Validation.Australia.NitrogenExperiment.KairiNitrogenExperiment.Kairi93.Factors.Fertiliser.Nitrogen50
                Operations Nitrogen75: same as Validation.Australia.NitrogenExperiment.KairiNitrogenExperiment.Kairi93.Factors.Fertiliser.Nitrogen75
                Operations Nitrogen100: same as Validation.Australia.NitrogenExperiment.KairiNitrogenExperiment.Kairi93.Factors.Fertiliser.Nitrogen100
                Operations Nitrogen150: same as Validation.Australia.NitrogenExperiment.KairiNitrogenExperiment.Kairi93.Factors.Fertiliser.Nitrogen150
            Simulation CasinoBase94
              Clock: Start=1993-12-29; End=1994-12-31
              Weather: FileName=Casino_-28.40_153.00.met
              Summary summaryfile
              SoilArbitrator Soil Arbitrator
              MicroClimate: a_interception=0; b_interception=1; c_interception=0; d_interception=0; SoilHeatFluxFraction=0.4; MinimumHeightDiffForNewLayer=0; NightInterceptionFraction=0.5; ReferenceHeight=2
              Zone Field: Area=1; Slope=0; AspectAngle=0; Altitude=50
                Operations Management: same as Validation.Australia.NitrogenExperiment.MutdapillyNitrogenExperiment.Mutdapilly94.MutdapillyBase94.Field.Management
                Irrigation
                Fertiliser
                SurfaceOrganicMatter: InitialResidueName=grass; InitialResidueType=grass; InitialResidueMass=1000; InitialStandingFraction=0; InitialCPR=0; InitialCNR=25
                PastureSpecies AGPRyegrass: same as Validation.Australia.Mutdapilly9294.Mutdapilly9294Base.Field.AgPRyegrass
                Report: same as Validation.Australia.NitrogenExperiment.KairiNitrogenExperiment.Kairi94.KairiBase94.Field.Report
                Manager Irrigated: same as Validation.Australia.Mutdapilly9294.Factors.Irrigation.Full
                Operations DefoliationSchedule: same as Validation.Australia.NitrogenExperiment.KairiNitrogenExperiment.Kairi94.KairiBase94.Field.DefoliationSchedule
                Soil: same as Validation.Australia.NitrogenExperiment.KairiNitrogenExperiment.Kairi93.KairiBase93.Field.Soil
                Operations FertilisationSchedule
          Experiment Casino91
            Factors: same as Validation.Australia.NitrogenExperiment.KairiNitrogenExperiment.Kairi93.Factors
            Simulation CasinoBase91
              Clock: Start=1990-12-30; End=1991-12-31
              Weather: FileName=Casino_-28.40_153.00.met
              Summary summaryfile
              SoilArbitrator Soil Arbitrator
              MicroClimate: a_interception=0; b_interception=1; c_interception=0; d_interception=0; SoilHeatFluxFraction=0.4; MinimumHeightDiffForNewLayer=0; NightInterceptionFraction=0.5; ReferenceHeight=2
              Zone Field: same as Validation.Australia.NitrogenExperiment.MutdapillyNitrogenExperiment.Mutdapilly91.MutdapillyBase91.Field
    Folder NewZealand
      Folder Lincoln
        Experiment RainShelter: DisabledSimNames=[Iversen_8Waterdry]
          Documentation RainshelterDoc
            This experiment ryegrass with different irrigation treatments under the rain-out shelter at Lincoln

            1. Location: Lincoln, New Zealand
            2. Clock: 14/03/2006 - 1/07/2008
            3. Irrigation: Weekly, SpringDrought,AutumnDrought,2Weekly,2WeeksIn3,1WeekIn4
            4. Sowing Date: 2006-03-15 to 1/07/2008
            5. Model: AgPasture
            6. Fertiliser: ManagerScript used ApplyFertOnDates
            7. Cultivar: Aurora
            8. Report Variables: sum(NO3.kgha), SoilWater.Eo, sum(Output.SWmm) , SoilWater.Es, SoilWater.Eos, SoilWater.Runoff, SoilWater.Infiltration, SoilWater.Drainage, GlfNContent, GlfWaterSupply, Leaf.Live.Wt, AboveGroundHarvestable.Wt, Sum of HarvestedWt *0.1 from 1-Jan to 31-Dec as AnnualPastureYield, Leaf.Dead.Wt, Height, CoverGreen, CoverTotal, LAI, RootWt, InitialRootDepth, Root.Depth, PotentialEP, PotentialEPa, PotentialEPr
            9. Observed file: RainShelter.xlsx
          Factors
            Permutation
              Factor Irrigation
                CompositeFactor Weekly: Specifications=[IrrigationEvents]
                  Operations IrrigationEvents
                    2006-08-07  [Irrigation].Apply(7)
                    2006-08-14  [Irrigation].Apply(7)
                    2006-08-21  [Irrigation].Apply(15)
                    2006-08-28  [Irrigation].Apply(13)
                    2006-09-04  [Irrigation].Apply(23)
                    2006-09-11  [Irrigation].Apply(16)
                    2006-09-18  [Irrigation].Apply(20.4)
                    2006-09-25  [Irrigation].Apply(24)
                    2006-10-02  [Irrigation].Apply(21)
                    2006-10-09  [Irrigation].Apply(21)
                    2006-10-16  [Irrigation].Apply(37)
                    2006-10-24  [Irrigation].Apply(32)
                    2006-10-30  [Irrigation].Apply(25)
                    2006-11-06  [Irrigation].Apply(29)
                    2006-11-13  [Irrigation].Apply(29.4)
                    2006-11-20  [Irrigation].Apply(30.4)
                    2006-11-27  [Irrigation].Apply(40)
                    2006-12-04  [Irrigation].Apply(44)
                    2006-12-11  [Irrigation].Apply(34)
                    2006-12-18  [Irrigation].Apply(32)
                    2006-12-25  [Irrigation].Apply(33.6)
                    2007-01-01  [Irrigation].Apply(37)
                    2007-01-08  [Irrigation].Apply(28.6)
                    2007-01-15  [Irrigation].Apply(24.4)
                    2007-01-22  [Irrigation].Apply(31)
                    2007-01-29  [Irrigation].Apply(30)
                    2007-02-05  [Irrigation].Apply(32)
                    2007-02-12  [Irrigation].Apply(31)
                    2007-02-19  [Irrigation].Apply(27)
                    2007-02-26  [Irrigation].Apply(31)
                    2007-03-05  [Irrigation].Apply(50)
                    2007-03-12  [Irrigation].Apply(17.8)
                    2007-03-19  [Irrigation].Apply(25)
                    2007-03-26  [Irrigation].Apply(27)
                    2007-04-02  [Irrigation].Apply(22)
                    2007-04-09  [Irrigation].Apply(22)
                    2007-04-16  [Irrigation].Apply(15.5)
                    2007-04-23  [Irrigation].Apply(12)
                    2007-04-30  [Irrigation].Apply(8)
                    2007-05-07  [Irrigation].Apply(10.5)
                    2007-08-13  [Irrigation].Apply(16.5)
                    2007-08-20  [Irrigation].Apply(8)
                    2007-08-27  [Irrigation].Apply(21.7)
                    2007-09-03  [Irrigation].Apply(15.6)
                    2007-09-10  [Irrigation].Apply(16.9)
                    2007-09-17  [Irrigation].Apply(19.1)
                    2007-09-24  [Irrigation].Apply(14.2)
                    2007-09-27  [Irrigation].Apply(9)
                    2007-10-01  [Irrigation].Apply(16)
                    2007-10-08  [Irrigation].Apply(28)
                    2007-10-15  [Irrigation].Apply(14.1018518518519)
                    2007-10-16  [Irrigation].Apply(3)
                    2007-10-23  [Irrigation].Apply(36.3)
                    2007-10-29  [Irrigation].Apply(35)
                    2007-11-05  [Irrigation].Apply(32)
                    2007-11-12  [Irrigation].Apply(29)
                    2007-11-15  [Irrigation].Apply(3.5)
                    2007-11-19  [Irrigation].Apply(31)
                    2007-11-26  [Irrigation].Apply(39)
                    2007-12-03  [Irrigation].Apply(30.4)
                    2007-12-05  [Irrigation].Apply(4.5)
                    2007-12-10  [Irrigation].Apply(34.8958333333333)
                    2007-12-17  [Irrigation].Apply(27)
                    2007-12-24  [Irrigation].Apply(32.2)
                    2007-12-31  [Irrigation].Apply(35)
                    2007-12-31  [Irrigation].Apply(3.7)
                    2008-01-07  [Irrigation].Apply(34.9)
                    2008-01-14  [Irrigation].Apply(40)
                    2008-01-21  [Irrigation].Apply(39.1)
                    2008-01-24  [Irrigation].Apply(8)
                    2008-01-28  [Irrigation].Apply(38)
                    2008-02-04  [Irrigation].Apply(43.0347222222222)
                    2008-02-11  [Irrigation].Apply(37)
                    2008-02-18  [Irrigation].Apply(28.7)
                    2008-02-25  [Irrigation].Apply(39.5)
                    2008-03-03  [Irrigation].Apply(35.6)
                    2008-03-10  [Irrigation].Apply(33.3)
                    2008-03-17  [Irrigation].Apply(33.1)
                    2008-03-19  [Irrigation].Apply(7.7)
                    2008-03-25  [Irrigation].Apply(35.9)
                    2008-03-31  [Irrigation].Apply(25.1)
                    2008-04-07  [Irrigation].Apply(29.2)
                    2008-04-14  [Irrigation].Apply(20.9)
                    2008-04-15  [Irrigation].Apply(4.9)
                    2008-04-21  [Irrigation].Apply(11.8)
                    2008-04-28  [Irrigation].Apply(10.6)
                    2008-05-12  [Irrigation].Apply(8.9)
                CompositeFactor SpringDrought: Specifications=[IrrigationEvents]
                  Operations IrrigationEvents
                    2007-01-08  [Irrigation].Apply(28.6)
                    2007-01-15  [Irrigation].Apply(24.4)
                    2007-01-22  [Irrigation].Apply(31)
                    2007-01-29  [Irrigation].Apply(30)
                    2007-02-05  [Irrigation].Apply(32)
                    2007-02-12  [Irrigation].Apply(31)
                    2007-02-19  [Irrigation].Apply(27)
                    2007-02-26  [Irrigation].Apply(31)
                    2007-03-05  [Irrigation].Apply(50)
                    2007-03-12  [Irrigation].Apply(17.8)
                    2007-03-19  [Irrigation].Apply(25)
                    2007-03-26  [Irrigation].Apply(27)
                    2007-04-02  [Irrigation].Apply(22)
                    2007-04-09  [Irrigation].Apply(22)
                    2007-04-16  [Irrigation].Apply(15.5)
                    2007-04-23  [Irrigation].Apply(12)
                    2007-04-30  [Irrigation].Apply(8)
                    2007-05-07  [Irrigation].Apply(10.5)
                    2007-08-13  [Irrigation].Apply(16.5)
                    2007-08-20  [Irrigation].Apply(8)
                    2007-09-27  [Irrigation].Apply(9)
                    2007-11-01  [Irrigation].Apply(5)
                    2008-01-17  [Irrigation].Apply(4.4)
                    2008-02-04  [Irrigation].Apply(43)
                    2008-02-11  [Irrigation].Apply(37)
                    2008-02-18  [Irrigation].Apply(28.7)
                    2008-02-25  [Irrigation].Apply(39.5)
                    2008-03-03  [Irrigation].Apply(35.6)
                    2008-03-10  [Irrigation].Apply(33.3)
                    2008-03-17  [Irrigation].Apply(33.1)
                    2008-03-19  [Irrigation].Apply(7.7)
                    2008-03-25  [Irrigation].Apply(35.9)
                    2008-03-31  [Irrigation].Apply(25.1)
                    2008-04-07  [Irrigation].Apply(29.2)
                    2008-04-14  [Irrigation].Apply(20.9)
                    2008-04-15  [Irrigation].Apply(5.9)
                    2008-04-21  [Irrigation].Apply(11.8)
                    2008-04-22  [Irrigation].Apply(5.8)
                    2008-04-28  [Irrigation].Apply(10.6)
                    2008-05-12  [Irrigation].Apply(8.9)
                CompositeFactor AutumnDrought: Specifications=[IrrigationEvents]
                  Operations IrrigationEvents
                    2006-08-07  [Irrigation].Apply(7)
                    2006-08-14  [Irrigation].Apply(7)
                    2006-08-21  [Irrigation].Apply(15)
                    2006-08-28  [Irrigation].Apply(13)
                    2006-09-04  [Irrigation].Apply(23)
                    2006-09-11  [Irrigation].Apply(16)
                    2006-09-18  [Irrigation].Apply(20.4)
                    2006-09-25  [Irrigation].Apply(24)
                    2006-10-02  [Irrigation].Apply(21)
                    2006-10-09  [Irrigation].Apply(21)
                    2006-10-16  [Irrigation].Apply(37)
                    2006-10-24  [Irrigation].Apply(32)
                    2006-10-30  [Irrigation].Apply(25)
                    2006-11-06  [Irrigation].Apply(29)
                    2006-11-13  [Irrigation].Apply(29.4)
                    2006-11-20  [Irrigation].Apply(30.4)
                    2006-11-27  [Irrigation].Apply(40)
                    2006-12-04  [Irrigation].Apply(44)
                    2006-12-11  [Irrigation].Apply(3)
                    2007-03-05  [Irrigation].Apply(18)
                    2007-04-16  [Irrigation].Apply(15.5)
                    2007-05-07  [Irrigation].Apply(10.5)
                    2007-08-13  [Irrigation].Apply(16.5)
                    2007-08-20  [Irrigation].Apply(8)
                    2007-08-27  [Irrigation].Apply(21.7)
                    2007-09-03  [Irrigation].Apply(15.6)
                    2007-09-10  [Irrigation].Apply(16.9)
                    2007-09-17  [Irrigation].Apply(19.1)
                    2007-09-24  [Irrigation].Apply(14.2)
                    2007-09-27  [Irrigation].Apply(9)
                    2007-10-01  [Irrigation].Apply(16)
                    2007-10-08  [Irrigation].Apply(28)
                    2007-10-15  [Irrigation].Apply(14.1018518518519)
                    2007-10-16  [Irrigation].Apply(3)
                    2007-10-23  [Irrigation].Apply(36.3)
                    2007-10-29  [Irrigation].Apply(35)
                    2007-11-05  [Irrigation].Apply(32)
                    2007-11-12  [Irrigation].Apply(29)
                    2007-11-15  [Irrigation].Apply(3.5)
                    2007-12-06  [Irrigation].Apply(3.3)
                    2008-01-17  [Irrigation].Apply(4.4)
                    2008-03-17  [Irrigation].Apply(36.2)
                    2008-03-25  [Irrigation].Apply(35.9)
                    2008-03-31  [Irrigation].Apply(25.1)
                    2008-04-07  [Irrigation].Apply(29.2)
                    2008-04-14  [Irrigation].Apply(20.9)
                    2008-04-21  [Irrigation].Apply(11.8)
                    2008-04-28  [Irrigation].Apply(10.6)
                    2008-05-12  [Irrigation].Apply(8.9)
                CompositeFactor 2Weekly: Specifications=[IrrigationEvents]
                  Operations IrrigationEvents
                    2006-08-07  [Irrigation].Apply(7)
                    2006-08-21  [Irrigation].Apply(15)
                    2006-09-04  [Irrigation].Apply(23)
                    2006-09-18  [Irrigation].Apply(20.4)
                    2006-10-02  [Irrigation].Apply(21)
                    2006-10-16  [Irrigation].Apply(37)
                    2006-10-30  [Irrigation].Apply(25)
                    2006-11-13  [Irrigation].Apply(29.4)
                    2006-11-27  [Irrigation].Apply(40)
                    2006-12-11  [Irrigation].Apply(34)
                    2006-12-25  [Irrigation].Apply(33.6)
                    2007-01-08  [Irrigation].Apply(28.6)
                    2007-01-22  [Irrigation].Apply(31)
                    2007-02-05  [Irrigation].Apply(32)
                    2007-02-19  [Irrigation].Apply(27)
                    2007-03-05  [Irrigation].Apply(50)
                    2007-03-19  [Irrigation].Apply(25)
                    2007-04-02  [Irrigation].Apply(22)
                    2007-04-16  [Irrigation].Apply(15.5)
                    2007-04-30  [Irrigation].Apply(8)
                    2007-08-13  [Irrigation].Apply(16.5)
                    2007-08-20  [Irrigation].Apply(8)
                    2007-09-03  [Irrigation].Apply(15.6)
                    2007-09-17  [Irrigation].Apply(20.4)
                    2007-09-27  [Irrigation].Apply(5.7)
                    2007-10-01  [Irrigation].Apply(16)
                    2007-10-15  [Irrigation].Apply(14.1018518518519)
                    2007-10-29  [Irrigation].Apply(35)
                    2007-10-30  [Irrigation].Apply(4)
                    2007-11-12  [Irrigation].Apply(29.2)
                    2007-11-26  [Irrigation].Apply(39)
                    2007-12-05  [Irrigation].Apply(3.6)
                    2007-12-10  [Irrigation].Apply(34.8958333333333)
                    2007-12-24  [Irrigation].Apply(32.2)
                    2007-12-31  [Irrigation].Apply(3.7)
                    2008-01-07  [Irrigation].Apply(34.9)
                    2008-01-21  [Irrigation].Apply(39.1)
                    2008-02-04  [Irrigation].Apply(43.2)
                    2008-02-07  [Irrigation].Apply(9.3)
                    2008-02-18  [Irrigation].Apply(28.7)
                    2008-03-03  [Irrigation].Apply(35.6)
                    2008-03-17  [Irrigation].Apply(33.1)
                    2008-03-19  [Irrigation].Apply(7.7)
                    2008-03-31  [Irrigation].Apply(25.1)
                    2008-04-14  [Irrigation].Apply(20.9)
                    2008-04-15  [Irrigation].Apply(4.9)
                    2008-04-28  [Irrigation].Apply(10.4)
                    2008-05-12  [Irrigation].Apply(9.2)
                CompositeFactor 2WeeksIn3: Specifications=[IrrigationEvents]
                  Operations IrrigationEvents
                    2006-08-07  [Irrigation].Apply(7)
                    2006-08-14  [Irrigation].Apply(7)
                    2006-08-28  [Irrigation].Apply(13)
                    2006-09-04  [Irrigation].Apply(23)
                    2006-09-18  [Irrigation].Apply(20.4)
                    2006-09-25  [Irrigation].Apply(24)
                    2006-10-09  [Irrigation].Apply(21)
                    2006-10-16  [Irrigation].Apply(37)
                    2006-10-30  [Irrigation].Apply(25)
                    2006-11-06  [Irrigation].Apply(29)
                    2006-11-20  [Irrigation].Apply(30.4)
                    2006-11-27  [Irrigation].Apply(40)
                    2006-12-11  [Irrigation].Apply(34)
                    2006-12-18  [Irrigation].Apply(32)
                    2007-01-01  [Irrigation].Apply(37)
                    2007-01-08  [Irrigation].Apply(28.6)
                    2007-01-22  [Irrigation].Apply(31)
                    2007-01-29  [Irrigation].Apply(30)
                    2007-02-12  [Irrigation].Apply(31)
                    2007-02-19  [Irrigation].Apply(27)
                    2007-03-05  [Irrigation].Apply(50)
                    2007-03-12  [Irrigation].Apply(17.8)
                    2007-03-26  [Irrigation].Apply(27)
                    2007-04-02  [Irrigation].Apply(22)
                    2007-04-16  [Irrigation].Apply(15.5)
                    2007-04-23  [Irrigation].Apply(12)
                    2007-05-07  [Irrigation].Apply(10.5)
                    2007-08-13  [Irrigation].Apply(16.5)
                    2007-08-20  [Irrigation].Apply(8)
                    2007-08-27  [Irrigation].Apply(21.7)
                    2007-09-03  [Irrigation].Apply(15.6)
                    2007-09-17  [Irrigation].Apply(20.4)
                    2007-09-24  [Irrigation].Apply(14.2)
                    2007-09-27  [Irrigation].Apply(5.7)
                    2007-10-08  [Irrigation].Apply(28)
                    2007-10-15  [Irrigation].Apply(14.9861111111111)
                    2007-10-29  [Irrigation].Apply(35)
                    2007-10-30  [Irrigation].Apply(4)
                    2007-11-05  [Irrigation].Apply(32)
                    2007-11-12  [Irrigation].Apply(29.2)
                    2007-11-19  [Irrigation].Apply(31)
                    2007-11-26  [Irrigation].Apply(39)
                    2007-12-06  [Irrigation].Apply(3.3)
                    2007-12-10  [Irrigation].Apply(34.9236111111111)
                    2007-12-17  [Irrigation].Apply(27)
                    2007-12-31  [Irrigation].Apply(35)
                    2008-01-07  [Irrigation].Apply(34.9)
                    2008-01-17  [Irrigation].Apply(1.2)
                    2008-01-21  [Irrigation].Apply(39.1)
                    2008-01-28  [Irrigation].Apply(38)
                    2008-02-07  [Irrigation].Apply(9.3)
                    2008-02-11  [Irrigation].Apply(37)
                    2008-02-18  [Irrigation].Apply(28.7)
                    2008-03-03  [Irrigation].Apply(35.6)
                    2008-03-10  [Irrigation].Apply(33.3)
                    2008-03-19  [Irrigation].Apply(7.7)
                    2008-03-25  [Irrigation].Apply(35.9)
                    2008-03-31  [Irrigation].Apply(25.1)
                    2008-04-14  [Irrigation].Apply(20.9)
                    2008-04-21  [Irrigation].Apply(11.8)
                    2008-04-22  [Irrigation].Apply(5.8)
                    2008-05-12  [Irrigation].Apply(9.2)
                CompositeFactor 1WeekIn4: Specifications=[IrrigationEvents]
                  Operations IrrigationEvents
                    2006-08-21  [Irrigation].Apply(15)
                    2006-09-18  [Irrigation].Apply(20.4)
                    2006-10-16  [Irrigation].Apply(37)
                    2006-11-13  [Irrigation].Apply(29.4)
                    2006-12-11  [Irrigation].Apply(34)
                    2007-01-08  [Irrigation].Apply(28.6)
                    2007-02-05  [Irrigation].Apply(32)
                    2007-03-05  [Irrigation].Apply(50)
                    2007-04-02  [Irrigation].Apply(22)
                    2007-04-30  [Irrigation].Apply(8)
                    2007-08-13  [Irrigation].Apply(16.5)
                    2007-08-20  [Irrigation].Apply(8)
                    2007-09-17  [Irrigation].Apply(20.4)
                    2007-09-27  [Irrigation].Apply(5.7)
                    2007-10-15  [Irrigation].Apply(14.9861111111111)
                    2007-10-30  [Irrigation].Apply(4)
                    2007-12-10  [Irrigation].Apply(34.9236111111111)
                    2008-01-07  [Irrigation].Apply(34.9)
                    2008-01-24  [Irrigation].Apply(8)
                    2008-02-04  [Irrigation].Apply(43.2)
                    2008-03-03  [Irrigation].Apply(35.6)
                    2008-03-31  [Irrigation].Apply(25.1)
                    2008-04-28  [Irrigation].Apply(10.4)
          Simulation Rainshelter
            Clock: Start=2006-03-14; End=2008-07-01
            Summary summaryfile
            Weather: FileName=NZ_Lincoln.met
            SoilArbitrator Soil Arbitrator
            MicroClimate: a_interception=0; b_interception=1; c_interception=0; d_interception=0; SoilHeatFluxFraction=0.4; MinimumHeightDiffForNewLayer=0; NightInterceptionFraction=0.5; ReferenceHeight=2
            Zone paddock: Area=1; Slope=0; AspectAngle=0; Altitude=50
              Irrigation
              Fertiliser
              SurfaceOrganicMatter surface organic matter: InitialResidueName=wheat; InitialResidueType=wheat; InitialResidueMass=0; InitialStandingFraction=0; InitialCPR=0; InitialCNR=80
              Operations IrrigationEvents
              Operations DefoliationEvents
                2006-09-13  [AgPRyegrass].RemoveBiomass(amount: 1500,	type: "SetResidueAmount")
                2006-10-04  [AgPRyegrass].RemoveBiomass(amount: 1500,	type: "SetResidueAmount")
                2006-11-01  [AgPRyegrass].RemoveBiomass(amount: 1500,	type: "SetResidueAmount")
                2007-01-05  [AgPRyegrass].RemoveBiomass(amount: 1500,	type: "SetResidueAmount")
                2007-02-21  [AgPRyegrass].RemoveBiomass(amount: 1500,	type: "SetResidueAmount")
                2007-04-11  [AgPRyegrass].RemoveBiomass(amount: 1500,	type: "SetResidueAmount")
                2007-05-14  [AgPRyegrass].RemoveBiomass(amount: 1500,	type: "SetResidueAmount")
                2007-09-25  [AgPRyegrass].RemoveBiomass(amount: 1500,	type: "SetResidueAmount")
                2007-10-23  [AgPRyegrass].RemoveBiomass(amount: 1500,	type: "SetResidueAmount")
                2008-01-21  [AgPRyegrass].RemoveBiomass(amount: 1500,	type: "SetResidueAmount")
                2008-04-29  [AgPRyegrass].RemoveBiomass(amount: 1500,	type: "SetResidueAmount")
                2008-05-14  [AgPRyegrass].RemoveBiomass(amount: 1500,	type: "SetResidueAmount")
              Soil TempletonSiltLoam: SoilType=NZ_sedementary; Region=Plains; State=Canterbury; Country=New Zealand; Latitude=0; Longitude=0
                DataSource=Generic profile descriptions provided by Trevor Webb and data for functional horizions based on SWAMP project results
                Comments=Bulk density values were measured on the fine earth fraction so values entered into apsim soil are adjusted down to account for stone content (assuming stones are inert from all soil process so their mass and volume is removed from model paramaters).  SAT, DUL, LL15 and Air dry have been adjusted down to account for stone content.  OC has not been adjusted so the model will get the correct carbon and N amounts using the adjusted BD.
                Chemical: PHUnits=Water
                  Thickness  PH  CEC
                  180        6   14.2515
                  150        6   11.150525
                  400        6   9.056
                  270        6   8.813
                  500        6   8.7959
                  CEC source: Calculated
                Physical
                  Thickness  ParticleSizeSand  ParticleSizeSilt  ParticleSizeClay  Rocks  BD     AirDry  LL15   DUL   SAT
                  200        5                 65                30                0      1      0.05    0.063  0.31  0.42
                  200        5                 65                30                0      1.324  0.12    0.12   0.31  0.37
                  200        5                 65                30                0      1.35   0.1     0.14   0.29  0.37
                  200        5                 65                30                0      1.301  0.08    0.155  0.32  0.37
                  200        5                 65                30                0      1.301  0.08    0.08   0.33  0.36
                  200        5                 65                30                0      1.301  0.12    0.12   0.33  0.36
                  200        5                 65                30                0      1.301  0.18    0.18   0.33  0.37
                  200        5                 65                30                0      1.301  0.12    0.22   0.3   0.31
                  ParticleSizeSand, ParticleSizeSilt, ParticleSizeClay source: Calculated
                  SoilCrop AGPRyegrassSoil: LL=[0.063, 0.12, 0.14, 0.155, 0.148, 0.182, 0.27, 0.22]; KL=[0.03, 0.03, 0.03, 0.02, 0.02, 0.01, 0.01, 0.01]; XF=[1, 1, 1, 1, 1, 1, 1, 1]
                WaterBalance SoilWater: SummerDate=1-oct; SummerU=9; SummerCona=5; WinterDate=1-Apr; WinterU=9; WinterCona=5; DiffusConst=0; DiffusSlope=0; Salb=0.13; CN2Bare=0; CNRed=0; CNCov=0.8; PSIDul=-100; Thickness=[200, 200, 200, 200, 200, 200, 200, 200]; SWCON=[0.7, 0.7, 0.7, 0.7, 0.7, 0.7, 0.7, 0.7]
                Organic: FOMCNRatio=40; CarbonUnits=Total
                  Thickness  Carbon  SoilCNRatio  FBiom   FInert  FOM
                  180        2.6251  11           0.0333  0.4371  427.528
                  150        1.2469  11           0.0187  0.6569  316.72
                  400        0.316   11           0.0117  0.8496  142.312
                  270        0.208   11           0.0102  0.945   82.9318
                  500        0.2004  11           0.01    0.9827  30.5089
                Water: Thickness=[200, 200, 200, 200, 200, 200, 200, 200]; InitialValues=[0.35, 0.32, 0.31, 0.32, 0.33, 0.33, 0.33, 0.236]; FilledFromTop=false
                Nutrient
                Solute NO3: Thickness=[180, 150, 400, 270, 500]; InitialValues=[265, 40.2427, 5.01813, 2.41979, 1.9216]; InitialValuesUnits=ppm; WaterTableConcentration=0; D0=0; DepthConstant=0; MaxDepthSoluteAccessible=0; RunoffEffectivenessAtMovingSolute=0; MaxEffectiveRunoff=0
                Solute NH4: Thickness=[180, 150, 400, 270, 500]; InitialValues=[1.5, 0.854582, 0.442264, 0.38432, 0.38432]; InitialValuesUnits=ppm; WaterTableConcentration=0; D0=0; DepthConstant=0; MaxDepthSoluteAccessible=0; RunoffEffectivenessAtMovingSolute=0; MaxEffectiveRunoff=0
                Solute Urea: Thickness=[180, 150, 400, 270, 500]; InitialValues=[0, 0, 0, 0, 0]; InitialValuesUnits=kg/ha; WaterTableConcentration=0; D0=0; DepthConstant=0; MaxDepthSoluteAccessible=0; RunoffEffectivenessAtMovingSolute=0; MaxEffectiveRunoff=0
                SoilTemperature Temperature
                OutputLayers Output: Thickness=[200, 200, 200, 200, 200, 200, 200, 200]
              PastureSpecies AGPRyegrass: same as Validation.Australia.Mutdapilly9294.Mutdapilly9294Base.Field.AgPRyegrass
              SprumPastureInstance GrassSpecies (disabled): AgeAtSimulationStart=0; YearsToMaxDimension=2; RUE=1.6; Presidue=0.15; RsenRate=0.01; Proot=0.1; PSBaseT=0; PSLOptT=20; PSUOptT=25; PSMaxT=40; GRINZ=false; MaxRD=2500; MaxHeight=600; MaxPrunedHeight=50; MaxCover=0.98; MinCover=0.05; ExtinctCoeff=0.7; RegrowthDuration=300; FullCanopyDuration=10000; BaseT=6; OptT=25; MaxT=35; RootNConc=0.01; LeafNConc=0.05; ResidueNConc=0.01; LegumePropn=1; GSMax=0.006; R50=175; SurfaceKL=0.11; WaterStress=true
              Report: EventNames=[Clock].EndOfDay
                VariableNames:
                  [Clock].Today
                  [SurfaceOrganicMatter].Wt
                  [Soil].Output.SW
                  sum([Soil].NO3.kgha)
                  [Soil].SoilWater.Eo
                  sum([Soil].Output.SWmm)
                  [Soil].SoilWater.Es
                  [Soil].SoilWater.Eos
                  [Soil].SoilWater.Runoff
                  [Soil].SoilWater.Infiltration
                  [Soil].SoilWater.Drainage
                  [AgPRyegrass].GlfNContent
                  [AgPRyegrass].GlfWaterSupply
                  [AgPRyegrass].Leaf.Live.Wt
                  [AgPRyegrass].AboveGroundHarvestable.Wt
                  [AgPRyegrass].AboveGround.Wt
                  Sum of [AgPRyegrass].HarvestedWt *0.1 from 1-Jan to 31-Dec as AnnualPastureYield
                  [AgPRyegrass].Leaf.Dead.Wt
                  [AgPRyegrass].Height
                  [AgPRyegrass].CoverGreen
                  [AgPRyegrass].CoverTotal
                  [AgPRyegrass].LAI
                  [AgPRyegrass].RootWt
                  [AgPRyegrass].InitialRootDepth
                  [AgPRyegrass].Root.Depth
                  [AgPRyegrass].PotentialEP
                  [AgPRyegrass].PotentialEPa
                  [AgPRyegrass].PotentialEPr
              Manager ClimateController
                AllowControl = True
                EnableDate = 09/01/2006 00:00:00
                WithinYearControl = False
                ControlStart =
                ControlEnd =
                RainfallMultiplier = 0
                RainfallAddition = 0
                RadiationMultiplier = 1
                RadiationAddition = 0
                MinTMultiplier = 1
                MinTAddition = 0
                MaxTMultiplier = 1
                MaxTAddition = 0
                WindMultiplier = 1
                WindAddition = 0
                VPMultiplier = 1
                VPAddition = 0
```csharp
using Newtonsoft.Json;
using APSIM.Shared.Utilities;
using Models.Interfaces;
using Models.Soils;
using Models.PMF;
using Models.Core;
using System.Xml.Serialization;
using System;
using System.Linq;
using Models.Soils.Nutrients;
using Models.Climate;

namespace Models
{
    [Serializable]
    public class Script : Model
    {
        // - Links to APSIM models
        [Link] Zone zone;
        [Link] Clock clock;
        [Link] Weather weather;
        [Link] ISummary summary = null;

        // - Parameters for this manager
        [Description("Enabled (untick to disable this manager)")] public bool AllowControl { get; set; }

        [Separator("General settings")]
        [Description("Start the climate controls beginning on date (dd/mmm/yyyy): ")] public DateTime EnableDate { get; set; }
        [Description("Implement climate control only during part of the year?")] public bool WithinYearControl { get; set; }
        [Description("Within each year, the first day to start the climate controls is (dd-mmm)")] public string ControlStart { get; set; }
        [Description("Within each year, end last day of climate control is (dd-mmm)")] public string ControlEnd { get; set; }

        [Separator("Rainfall")]
        [Description("Rainfall multiplier (-): ")] public double RainfallMultiplier { get; set; }
        [Description("Rainfall addition (mm): ")] public double RainfallAddition { get; set; }

        [Separator("Radiation")]
        [Description("Radiation multiplier (-): ")] public double RadiationMultiplier { get; set; }
        [Description("Radiation addition (MJ/m2): ")] public double RadiationAddition { get; set; }

        [Separator("Minimum temperature")]
        [Description("Minimum temperature multiplier (-): ")] public double MinTMultiplier { get; set; }
        [Description("Minimum temperature addition (C): ")] public double MinTAddition { get; set; }

        [Separator("Maximum temperature")]
        [Description("Maximum temperature multiplier (-): ")] public double MaxTMultiplier { get; set; }
        [Description("Maximum temperature addition (C): ")] public double MaxTAddition { get; set; }

        [Separator("Wind speed")]
        [Description("Wind speed multiplier (-): ")] public double WindMultiplier { get; set; }
        [Description("Wind speed addition (m/s): ")] public double WindAddition { get; set; }

        [Separator("Vapour pressure")]
        [Description("Vapour pressure multiplier (-): ")] public double VPMultiplier { get; set; }
        [Description("Vapour pressure addition (hPa): ")] public double VPAddition { get; set; }

        [JsonIgnore] public bool DoControl { get; set; }
        [JsonIgnore] public int DoControlInt { get; set; }

        [EventSubscribe("PreparingNewWeatherData")] private void OnDoManagement(object sender, EventArgs e)
        {
            // Check if this manager is enabled
            if ((AllowControl) && (clock.Today >= EnableDate))
            {
                DoControl = true;
                if (WithinYearControl)
                    DoControl = DateUtilities.WithinDates(ControlStart, clock.Today, ControlEnd); 
            }

            if (DoControl)
                DoControlInt = 1;
            else
                DoControlInt = 0;

            if (DoControl)
            {
                // do the weather alterations 
                weather.Rain = RainfallMultiplier * weather.Rain + RainfallAddition;
                weather.Radn = RadiationMultiplier * weather.Radn + RadiationAddition;
                weather.MinT = MinTMultiplier * weather.MinT + MinTAddition;
                weather.MaxT = MaxTMultiplier * weather.MaxT + MaxTAddition;
                weather.Wind = WindMultiplier * weather.Wind + WindAddition;
                weather.VP = VPMultiplier * weather.VP + VPAddition;
            }
        }
    }
}
```
              Operations Rewetting
                2007-06-21  [Irrigation].Apply(25)
                2007-06-22  [Irrigation].Apply(25)
                2007-06-23  [Irrigation].Apply(25)
                2007-06-24  [Irrigation].Apply(25)
                2007-07-03  [Irrigation].Apply(25)
                2007-07-04  [Irrigation].Apply(25)
                2007-07-23  [Irrigation].Apply(25)
                2007-07-24  [Irrigation].Apply(25)
              Operations Sowing
                2006-03-15  [AgPRyegrass].Sow(population: 1, cultivar: "Aurora", depth: 5, rowSpacing: 150)
            Manager ApplyFertOnDates
              FertiliserType = NO3N
              FertiliserDates = 1-Aug, 15-Aug, 1-Sep, 15-Sep, 1-Nov, 15-Nov, 1-dec, 15-dec, 1-Jan, 15-Jan, 1-Feb, 15-Feb, 1-Mar, 15-Mar
              Amount = 500
              AmountType = False
```csharp
using Models.Soils;
using System;
using Models.Core;
using Models.PMF;
using APSIM.Shared.Utilities;
namespace Models
{
    [Serializable]
    public class Script : Model
    {
        [Link] Clock Clock;
        [Link] Fertiliser Fertiliser;
        
        [Separator("A component to apply fertiliser on one or more dates on every year of the simulation")]

        [Description("Type of fertiliser to apply? ")] 
        [Display(Type = DisplayType.FertiliserType)]public string FertiliserType { get; set; }

        [Description("Enter the fertilisation dates as dd-mmm with comma separation (any year information entered will be ignored): ")] 
        public string[] FertiliserDates { get; set; } 

        [Description("Amount of fertiliser to be applied (kg /ha)")] 
        public double Amount { get; set; }

        [Description("Is the above amount to be applied each time? (yes/ticked)? Or is it the total annual amount across all dates (no/unticked)")] 
        public bool AmountType { get; set; }
        
        [EventSubscribe("DoManagement")]
        private void OnDoManagement(object sender, EventArgs e)
        {
            foreach (string ddMMM in FertiliserDates)
            {
                if (DateUtilities.DatesEqual(ddMMM, Clock.Today))
                {
                    if (AmountType)
                        Fertiliser.Apply(amount: Amount, type: FertiliserType);
                    else
                        Fertiliser.Apply(amount: Amount / FertiliserDates.Length, type: FertiliserType);
                }
            }
        }
    }
}
```
        Experiment LandP
          Memo
            This experiment was run over 3 years in Lincoln, New Zealand on a shallow stony soil.  It is described in full by [#Teixeira_Brown_Michel_Meenken_Hu_Thomas_Huth_Holzworth_2018] Treatments of Lucerne and Pasture (Ryegrass) were established in the Autumn of 2011 and irrigtion treatments were installed in the spring of 2011 and applied for three years.  Treatments were:

             - None where no irrigation was applied
             - TwoPerWeek where irrigation was applied twice per week during spring/summer/autumn to replace water use measured by neutron probe
             - OnePerWeek where the same amout of irrigation was applied as the above treatment but at weekly frequency (i.e fewer, larger irrigations)
             - ThreeWeekly where the same amount of irrigation was applied as abouve but at a 3 weekely frequency (i.e fewer, larger irrigations)

            Lucerne and pasture were defoliated at differing frequiencies following best mananagment practice resulting in 8-10 regrowth period per year for pasture and 5-6 for lucerne.  Neutron probes were installed to 1.6 m depth using a 20T digger with a pnumatic plate on its boom to drive and extract a pilot rod into the stony sub soil and then an aluminum access tube was installed into the resultant hole.  Neutron probes measurements were tatken at 7 - 10 day intervals during the irrigation season.  CS616 probes were also installed in the top soil at 0-15 and 15-30 cm depths in each plot and logged hourly.
          Factors
            Permutation
              Factor Irrigation
                CompositeFactor TwoPerWeek: Specifications=[IrrigationEvents]
                  Operations IrrigationEvents
                    2011-11-07  [Irrigation].Apply(30);
                    2011-11-25  [Irrigation].Apply(13.6);
                    2011-11-28  [Irrigation].Apply(20.1);
                    2011-11-29  [Irrigation].Apply(16.4);
                    2011-12-05  [Irrigation].Apply(27);
                    2011-12-15  [Irrigation].Apply(8);
                    2011-12-26  [Irrigation].Apply(22.5);
                    2011-12-29  [Irrigation].Apply(16.5);
                    2012-01-05  [Irrigation].Apply(22.8);
                    2012-01-09  [Irrigation].Apply(17.8);
                    2012-01-12  [Irrigation].Apply(9.1);
                    2012-01-16  [Irrigation].Apply(18.3);
                    2012-01-19  [Irrigation].Apply(18.6);
                    2012-01-23  [Irrigation].Apply(22.5);
                    2012-01-30  [Irrigation].Apply(8);
                    2012-02-02  [Irrigation].Apply(12);
                    2012-02-07  [Irrigation].Apply(16.5);
                    2012-02-09  [Irrigation].Apply(13.3);
                    2012-02-13  [Irrigation].Apply(12.2);
                    2012-02-20  [Irrigation].Apply(13.3);
                    2012-02-23  [Irrigation].Apply(8.8);
                    2012-03-29  [Irrigation].Apply(10);
                    2012-04-02  [Irrigation].Apply(6.5);
                    2012-04-05  [Irrigation].Apply(5);
                    2012-04-10  [Irrigation].Apply(6.9);
                    2012-04-26  [Irrigation].Apply(4.6);
                    2012-04-30  [Irrigation].Apply(6.9);
                    2012-05-03  [Irrigation].Apply(3.2);
                    2012-11-01  [Irrigation].Apply(18);
                    2012-11-15  [Irrigation].Apply(12);
                    2012-11-22  [Irrigation].Apply(12);
                    2012-11-26  [Irrigation].Apply(12);
                    2012-11-29  [Irrigation].Apply(12);
                    2012-12-03  [Irrigation].Apply(6);
                    2012-12-06  [Irrigation].Apply(12);
                    2012-12-13  [Irrigation].Apply(12);
                    2012-12-17  [Irrigation].Apply(20.8);
                    2012-12-20  [Irrigation].Apply(12);
                    2012-12-24  [Irrigation].Apply(12);
                    2012-12-27  [Irrigation].Apply(9);
                    2012-12-31  [Irrigation].Apply(12);
                    2013-01-03  [Irrigation].Apply(12);
                    2013-01-07  [Irrigation].Apply(18);
                    2013-01-10  [Irrigation].Apply(18);
                    2013-01-14  [Irrigation].Apply(21);
                    2013-01-21  [Irrigation].Apply(15);
                    2013-01-24  [Irrigation].Apply(15);
                    2013-01-28  [Irrigation].Apply(15);
                    2013-01-31  [Irrigation].Apply(15);
                    2013-02-04  [Irrigation].Apply(18);
                    2013-02-07  [Irrigation].Apply(6);
                    2013-02-11  [Irrigation].Apply(18.7);
                    2013-02-14  [Irrigation].Apply(13.5);
                    2013-02-18  [Irrigation].Apply(15);
                    2013-02-21  [Irrigation].Apply(15);
                    2013-02-25  [Irrigation].Apply(15);
                    2013-02-28  [Irrigation].Apply(32);
                    2013-03-07  [Irrigation].Apply(12);
                    2013-03-11  [Irrigation].Apply(9);
                    2013-03-14  [Irrigation].Apply(9);
                    2013-03-28  [Irrigation].Apply(18);
                    2013-04-04  [Irrigation].Apply(9);
                    2013-04-11  [Irrigation].Apply(9);
                    2013-10-24  [Irrigation].Apply(9);
                    2013-10-31  [Irrigation].Apply(15);
                    2013-11-04  [Irrigation].Apply(6);
                    2013-11-07  [Irrigation].Apply(9);
                    2013-11-11  [Irrigation].Apply(9);
                    2013-11-14  [Irrigation].Apply(9);
                    2013-11-18  [Irrigation].Apply(12);
                    2013-11-21  [Irrigation].Apply(12);
                    2013-11-25  [Irrigation].Apply(9);
                    2013-12-02  [Irrigation].Apply(9);
                    2013-12-05  [Irrigation].Apply(12);
                    2013-12-09  [Irrigation].Apply(6);
                    2013-12-12  [Irrigation].Apply(11);
                    2013-12-17  [Irrigation].Apply(15);
                    2013-12-23  [Irrigation].Apply(7);
                    2014-01-06  [Irrigation].Apply(14);
                    2014-01-09  [Irrigation].Apply(12.6);
                    2014-01-13  [Irrigation].Apply(15.7);
                    2014-01-16  [Irrigation].Apply(14.7);
                    2014-01-20  [Irrigation].Apply(17.5);
                    2014-01-23  [Irrigation].Apply(7.5);
                    2014-01-30  [Irrigation].Apply(10);
                    2014-02-03  [Irrigation].Apply(12);
                    2014-02-05  [Irrigation].Apply(10);
                    2014-02-10  [Irrigation].Apply(9);
                    2014-02-17  [Irrigation].Apply(10);
                    2014-02-20  [Irrigation].Apply(10);
                CompositeFactor OnePerWeek: Specifications=[IrrigationEvents]
                  Operations IrrigationEvents
                    2011-11-07  [Irrigation].Apply(30);
                    2011-11-25  [Irrigation].Apply(13.6);
                    2011-11-29  [Irrigation].Apply(36.5);
                    2011-12-15  [Irrigation].Apply(34.9);
                    2011-12-29  [Irrigation].Apply(41.8);
                    2012-01-05  [Irrigation].Apply(22.8);
                    2012-01-12  [Irrigation].Apply(26.9);
                    2012-01-19  [Irrigation].Apply(36.8);
                    2012-02-02  [Irrigation].Apply(19.8);
                    2012-02-09  [Irrigation].Apply(30);
                    2012-02-16  [Irrigation].Apply(13);
                    2012-02-23  [Irrigation].Apply(14.3);
                    2012-03-29  [Irrigation].Apply(10);
                    2012-04-05  [Irrigation].Apply(11.4);
                    2012-04-26  [Irrigation].Apply(11.5);
                    2012-05-03  [Irrigation].Apply(10.1);
                    2012-11-01  [Irrigation].Apply(18);
                    2012-11-15  [Irrigation].Apply(12);
                    2012-11-29  [Irrigation].Apply(24);
                    2012-12-13  [Irrigation].Apply(21);
                    2012-12-27  [Irrigation].Apply(33);
                    2013-01-10  [Irrigation].Apply(42);
                    2013-01-24  [Irrigation].Apply(39);
                    2013-02-07  [Irrigation].Apply(30);
                    2013-02-21  [Irrigation].Apply(42);
                    2013-02-28  [Irrigation].Apply(20);
                    2013-03-07  [Irrigation].Apply(30);
                    2013-04-04  [Irrigation].Apply(27);
                    2013-04-18  [Irrigation].Apply(15);
                    2013-10-24  [Irrigation].Apply(12);
                    2013-11-07  [Irrigation].Apply(24);
                    2013-11-21  [Irrigation].Apply(33);
                    2013-12-05  [Irrigation].Apply(30);
                    2013-12-19  [Irrigation].Apply(17);
                    2014-01-02  [Irrigation].Apply(12.7);
                    2014-01-16  [Irrigation].Apply(40.9);
                    2014-01-30  [Irrigation].Apply(35);
                    2014-02-13  [Irrigation].Apply(25);
                    2014-02-27  [Irrigation].Apply(32);
                CompositeFactor ThreeWeekly: Specifications=[IrrigationEvents]
                  Operations IrrigationEvents
                    2011-11-07  [Irrigation].Apply(30);
                    2011-11-29  [Irrigation].Apply(47.6);
                    2011-12-15  [Irrigation].Apply(34.9);
                    2011-12-29  [Irrigation].Apply(41.8);
                    2012-01-12  [Irrigation].Apply(49.8);
                    2012-01-26  [Irrigation].Apply(36.8);
                    2012-02-09  [Irrigation].Apply(49.6);
                    2012-02-23  [Irrigation].Apply(34.3);
                    2012-04-05  [Irrigation].Apply(21.4);
                    2012-05-03  [Irrigation].Apply(23.7);
                    2012-11-01  [Irrigation].Apply(18);
                    2012-11-22  [Irrigation].Apply(12);
                    2012-12-13  [Irrigation].Apply(27);
                    2013-01-03  [Irrigation].Apply(42);
                    2013-01-24  [Irrigation].Apply(45);
                    2013-02-14  [Irrigation].Apply(90.6);
                    2013-02-28  [Irrigation].Apply(20);
                    2013-03-07  [Irrigation].Apply(30);
                    2013-03-28  [Irrigation].Apply(18);
                    2013-04-18  [Irrigation].Apply(15);
                    2013-10-24  [Irrigation].Apply(12);
                    2013-11-14  [Irrigation].Apply(33);
                    2013-12-05  [Irrigation].Apply(36);
                    2014-01-16  [Irrigation].Apply(44.7);
                    2014-02-05  [Irrigation].Apply(33.5);
                    2014-02-27  [Irrigation].Apply(32);
                CompositeFactor None: Specifications=[IrrigationEvents]
                  Operations IrrigationEvents
                    2013-02-28  [Irrigation].Apply(20);
              Factor CoverType (disabled)
                CompositeFactor Ryegrass
                  Specifications:
                    //[BasePasture]
                    //[Spectral].GreenCropNDVI = 0.95
                    //[GrazingSchedule]
                    [FertiliserSchedule]
                    [DefoliationEvents]
                  Operations FertiliserSchedule
                    2011-03-25  [Fertiliser].Apply(amount:40 , type:NO3N)
                    2011-08-12  [Fertiliser].Apply(amount:100, type:NO3N)
                    2011-10-01  [Fertiliser].Apply(amount:100, type:NO3N)
                    2011-11-02  [Fertiliser].Apply(amount:122, type:NO3N)
                    2011-12-05  [Fertiliser].Apply(amount:79 , type:NO3N)
                    2011-12-29  [Fertiliser].Apply(amount:81 , type:NO3N)
                    2012-02-01  [Fertiliser].Apply(amount:100, type:NO3N)
                    2012-03-02  [Fertiliser].Apply(amount:115, type:NO3N)
                    2012-04-10  [Fertiliser].Apply(amount:102, type:NO3N)
                    2012-09-11  [Fertiliser].Apply(amount:100, type:NO3N)
                    2012-10-18  [Fertiliser].Apply(amount:102, type:NO3N)
                    2012-11-29  [Fertiliser].Apply(amount:115, type:NO3N)
                    2013-01-14  [Fertiliser].Apply(amount:81 , type:NO3N)
                    2013-02-28  [Fertiliser].Apply(amount:93 , type:NO3N)
                    2013-04-02  [Fertiliser].Apply(amount:84 , type:NO3N)
                    2013-09-12  [Fertiliser].Apply(amount:100, type:NO3N)
                    2013-10-14  [Fertiliser].Apply(amount:81 , type:NO3N)
                    2013-12-24  [Fertiliser].Apply(amount:71 , type:NO3N)
                    2014-02-28  [Fertiliser].Apply(amount:117, type:NO3N)
                    2014-04-04  [Fertiliser].Apply(amount:74 , type:NO3N)
                  Operations DefoliationEvents
                    2011-07-01  [AgPRyegrass].RemoveBiomass(amount: 500,	type: "SetResidueAmount")
                    2011-09-30  [AgPRyegrass].RemoveBiomass(amount: 500,	type: "SetResidueAmount")
                    2011-11-02  [AgPRyegrass].RemoveBiomass(amount: 500,	type: "SetResidueAmount")
                    2011-12-01  [AgPRyegrass].RemoveBiomass(amount: 500,	type: "SetResidueAmount")
                    2011-12-21  [AgPRyegrass].RemoveBiomass(amount: 500,	type: "SetResidueAmount")
                    2012-01-26  [AgPRyegrass].RemoveBiomass(amount: 500,	type: "SetResidueAmount")
                    2012-03-01  [AgPRyegrass].RemoveBiomass(amount: 500,	type: "SetResidueAmount")
                    2012-04-04  [AgPRyegrass].RemoveBiomass(amount: 500,	type: "SetResidueAmount")
                    2012-05-24  [AgPRyegrass].RemoveBiomass(amount: 500,	type: "SetResidueAmount")
                    2012-09-08  [AgPRyegrass].RemoveBiomass(amount: 500,	type: "SetResidueAmount")
                    2012-10-17  [AgPRyegrass].RemoveBiomass(amount: 500,	type: "SetResidueAmount")
                    2012-11-20  [AgPRyegrass].RemoveBiomass(amount: 500,	type: "SetResidueAmount")
                    2012-12-20  [AgPRyegrass].RemoveBiomass(amount: 500,	type: "SetResidueAmount")
                    2013-01-24  [AgPRyegrass].RemoveBiomass(amount: 500,	type: "SetResidueAmount")
                    2013-02-28  [AgPRyegrass].RemoveBiomass(amount: 500,	type: "SetResidueAmount")
                    2013-03-28  [AgPRyegrass].RemoveBiomass(amount: 500,	type: "SetResidueAmount")
                    2013-05-10  [AgPRyegrass].RemoveBiomass(amount: 500,	type: "SetResidueAmount")
                    2013-09-11  [AgPRyegrass].RemoveBiomass(amount: 500,	type: "SetResidueAmount")
                    2013-10-18  [AgPRyegrass].RemoveBiomass(amount: 500,	type: "SetResidueAmount")
                    2013-11-21  [AgPRyegrass].RemoveBiomass(amount: 500,	type: "SetResidueAmount")
                    2013-12-17  [AgPRyegrass].RemoveBiomass(amount: 500,	type: "SetResidueAmount")
                    2014-01-23  [AgPRyegrass].RemoveBiomass(amount: 500,	type: "SetResidueAmount")
                    2014-02-27  [AgPRyegrass].RemoveBiomass(amount: 500,	type: "SetResidueAmount")
                    2014-03-26  [AgPRyegrass].RemoveBiomass(amount: 500,	type: "SetResidueAmount")
                    2014-05-03  [AgPRyegrass].RemoveBiomass(amount: 500,	type: "SetResidueAmount")
                CompositeFactor Lucerne
                  Specifications:
                    [FertiliserSchedule]
                    [DefoliationEvents]
                  Operations FertiliserSchedule: same as Validation.NewZealand.Lincoln.LandP.Factors.Permutation.CoverType.Ryegrass.FertiliserSchedule
                  Operations DefoliationEvents: same as Validation.NewZealand.Lincoln.LandP.Factors.Permutation.CoverType.Ryegrass.DefoliationEvents
          Simulation LandPBase
            Weather: FileName=NZ_Lincoln.met
            Clock: Start=2011-03-14; End=2014-05-01
            Summary
            SoilArbitrator Soil Arbitrator
            Zone Field: Area=1; Slope=0; AspectAngle=0; Altitude=50
              Soil: Latitude=0; Longitude=0
                Chemical: PHUnits=Water
                  Thickness  PH   CEC
                  100        6.6  12.44
                  200        6.2  11.6525
                  300        5.7  11.045
                  300        5.5  10.6625
                  300        5.5  9.4025
                  300        5.5  9.4025
                  CEC source: Calculated
                Water: FilledFromTop=true
                  Thickness=[150, 150, 100, 200, 200, 200, 200, 200, 200, 200, 200, 200, 400]
                  InitialValues=[0.35, 0.305, 0.315, 0.143, 0.136, 0.12, 0.126, 0.1, 0.122, 0.13, 0.13, 0.13, 0.089]
                Physical
                  Thickness  ParticleSizeSand  ParticleSizeSilt  ParticleSizeClay  Rocks     BD   AirDry  LL15   DUL    SAT
                  150        5                 65                30                0         1.2  0.08    0.08   0.24   0.4
                  150        5                 65                30                0         1.2  0.1     0.1    0.26   0.4
                  100        5                 65                30                0.135336  1.2  0.135   0.135  0.315  0.4
                  200        5                 65                30                0         1.2  0.07    0.07   0.143  0.3
                  200        5                 65                30                0.135336  1.2  0.06    0.06   0.1    0.3
                  200        5                 65                30                0.135336  1.2  0.08    0.08   0.14   0.3
                  200        5                 65                30                0         1.2  0.085   0.085  0.126  0.3
                  200        5                 65                30                0.135336  1.2  0.1     0.1    0.126  0.3
                  200        5                 65                30                0.135336  1.2  0.09    0.09   0.122  0.3
                  200        5                 65                30                0.135336  1.2  0.06    0.06   0.13   0.3
                  200        5                 65                30                0.135336  1.2  0.06    0.06   0.13   0.3
                  200        5                 65                30                0.135336  1.2  0.06    0.06   0.13   0.3
                  400        5                 65                30                0.135336  1.2  0.06    0.06   0.13   0.3
                  Rocks, ParticleSizeSand, ParticleSizeSilt, ParticleSizeClay source: Calculated
                  SoilCrop AGPRyegrassSoil
                    LL=[0.08, 0.1, 0.135, 0.07, 0.06, 0.08, 0.085, 0.1, 0.09, 0.06, 0.06, 0.06, 0.06]
                    KL=[0.03, 0.03, 0.03, 0.03, 0.03, 0.02, 0.02, 0.02, 0.02, 0.02, 0.02, 0.02, 0.02]
                    XF=[1, 1, 1, 1, 1, 1, 1, 1, 1, 1, 1, 1, 1]
                WaterBalance SoilWater: SummerDate=1-Nov; SummerU=9; SummerCona=4.4; WinterDate=1-Apr; WinterU=9; WinterCona=4.4; DiffusConst=88; DiffusSlope=35.4; Salb=0.18; CN2Bare=68; CNRed=20; CNCov=0.8; DischargeWidth=0; CatchmentArea=0; PSIDul=-100
                  Thickness  SWCON  KLAT
                  150        0.2    0
                  150        0.2    0
                  100        0.55   0
                  200        0.55   0
                  200        0.55   0
                  200        0.55   0
                  200        0.55   0
                  200        0.55   0
                  200        0.55   0
                  200        0.55   0
                  200        0.55   0
                  200        0.55   0
                  400        0.55   0
                Nutrient
                Organic: FOMCNRatio=30; CarbonUnits=Total
                  Thickness  Carbon  SoilCNRatio  FBiom  FInert  FOM
                  100        1.82    11.5         0.025  0.3     1243.93
                  200        1.47    11.5         0.025  0.4     833.832
                  300        1.2     11.5         0.015  0.75    457.617
                  300        1.03    11.5         0.01   0.9     251.145
                  300        0.47    11.5         0.01   0.96    137.831
                  300        0.47    11.5         0.01   0.96    75.6435
                Solute NO3: Thickness=[100, 200, 300, 300, 300, 300]; InitialValues=[180.833, 12.5, 1.38889, 1.38889, 0, 0]; InitialValuesUnits=ppm; WaterTableConcentration=0; D0=0; DepthConstant=0; MaxDepthSoluteAccessible=0; RunoffEffectivenessAtMovingSolute=0; MaxEffectiveRunoff=0
                Solute NH4: Thickness=[100, 200, 300, 300, 300, 300]; InitialValues=[0, 0, 0, 0, 0, 0]; InitialValuesUnits=ppm; WaterTableConcentration=0; D0=0; DepthConstant=0; MaxDepthSoluteAccessible=0; RunoffEffectivenessAtMovingSolute=0; MaxEffectiveRunoff=0
                Solute Urea: Thickness=[100, 200, 300, 300, 300, 300]; InitialValues=[0, 0, 0, 0, 0, 0]; InitialValuesUnits=kg/ha; WaterTableConcentration=0; D0=0; DepthConstant=0; MaxDepthSoluteAccessible=0; RunoffEffectivenessAtMovingSolute=0; MaxEffectiveRunoff=0
                SoilTemperature Temperature
                OutputLayers Output: Thickness=[150, 150, 100, 200, 200, 200, 200, 200, 200]
              PastureSpecies AGPRyegrass: same as Validation.Australia.Mutdapilly9294.Mutdapilly9294Base.Field.AgPRyegrass
              MicroClimate: a_interception=0; b_interception=1; c_interception=0; d_interception=0; SoilHeatFluxFraction=0.4; MinimumHeightDiffForNewLayer=0; NightInterceptionFraction=0.5; ReferenceHeight=2
              Irrigation
              Fertiliser
              SurfaceOrganicMatter surface organic matter: InitialResidueName=wheat; InitialResidueType=wheat; InitialResidueMass=2000; InitialStandingFraction=0; InitialCPR=0; InitialCNR=80
              Report: EventNames=[Clock].EndOfDay
                VariableNames:
                  [Clock].Today
                  [SurfaceOrganicMatter].Wt
                  [Soil].SoilWater.Eos
                  sum([Soil].Output.SWmm)
                  [Soil].Output.SWmm
                  [Soil].Output.SW
                  [Soil].SoilWater.Es
                  [Soil].SoilWater.Eos
                  [Soil].SoilWater.Runoff
                  [Soil].SoilWater.Infiltration
                  [Soil].SoilWater.Drainage
                  [AgPRyegrass].GlfNContent
                  [AgPRyegrass].GlfWaterSupply
                  [AgPRyegrass].Leaf.Live.Wt
                  [AgPRyegrass].AboveGroundHarvestable.wt
                  [AgPRyegrass].AboveGround.Wt
                  Sum of [AgPRyegrass].HarvestedWt *0.1 from 1-Jan to 31-Dec as AnnualPastureYield
                  [AgPRyegrass].Leaf.Dead.Wt
                  [AgPRyegrass].Height
                  [AgPRyegrass].CoverGreen
                  [AgPRyegrass].CoverTotal
                  [AgPRyegrass].LAI
                  [AgPRyegrass].RootWt
                  [AgPRyegrass].Root.Depth
                  [AgPRyegrass].RootDepth
                  [Spectral].NDVI
              Spectral: DrySoilNDVI=0.1; WetSoilNDVI=0.25; GreenCropNDVI=0.9; DeadCropNDVI=0.1
              Operations Sowing
                2011-03-15  [AgPRyegrass].Sow(population: 1, cultivar: "Aurora", depth: 5, rowSpacing: 150)
              Operations DefoliationEvents
                2011-07-01  [AgPRyegrass].RemoveBiomass(amount: 1500,	type: "SetResidueAmount")
                2011-09-30  [AgPRyegrass].RemoveBiomass(amount: 1500,	type: "SetResidueAmount")
                2011-11-02  [AgPRyegrass].RemoveBiomass(amount: 1500,	type: "SetResidueAmount")
                2011-12-01  [AgPRyegrass].RemoveBiomass(amount: 1500,	type: "SetResidueAmount")
                2011-12-21  [AgPRyegrass].RemoveBiomass(amount: 1500,	type: "SetResidueAmount")
                2012-01-26  [AgPRyegrass].RemoveBiomass(amount: 1500,	type: "SetResidueAmount")
                2012-03-01  [AgPRyegrass].RemoveBiomass(amount: 1500,	type: "SetResidueAmount")
                2012-04-04  [AgPRyegrass].RemoveBiomass(amount: 1500,	type: "SetResidueAmount")
                2012-05-24  [AgPRyegrass].RemoveBiomass(amount: 1500,	type: "SetResidueAmount")
                2012-09-08  [AgPRyegrass].RemoveBiomass(amount: 1500,	type: "SetResidueAmount")
                2012-10-17  [AgPRyegrass].RemoveBiomass(amount: 1500,	type: "SetResidueAmount")
                2012-11-20  [AgPRyegrass].RemoveBiomass(amount: 1500,	type: "SetResidueAmount")
                2012-12-20  [AgPRyegrass].RemoveBiomass(amount: 1500,	type: "SetResidueAmount")
                2013-01-24  [AgPRyegrass].RemoveBiomass(amount: 1500,	type: "SetResidueAmount")
                2013-02-28  [AgPRyegrass].RemoveBiomass(amount: 1500,	type: "SetResidueAmount")
                2013-03-28  [AgPRyegrass].RemoveBiomass(amount: 1500,	type: "SetResidueAmount")
                2013-05-10  [AgPRyegrass].RemoveBiomass(amount: 1500,	type: "SetResidueAmount")
                2013-09-11  [AgPRyegrass].RemoveBiomass(amount: 1500,	type: "SetResidueAmount")
                2013-10-18  [AgPRyegrass].RemoveBiomass(amount: 1500,	type: "SetResidueAmount")
                2013-11-21  [AgPRyegrass].RemoveBiomass(amount: 1500,	type: "SetResidueAmount")
                2013-12-17  [AgPRyegrass].RemoveBiomass(amount: 1500,	type: "SetResidueAmount")
                2014-01-23  [AgPRyegrass].RemoveBiomass(amount: 1500,	type: "SetResidueAmount")
                2014-02-27  [AgPRyegrass].RemoveBiomass(amount: 1500,	type: "SetResidueAmount")
                2014-03-26  [AgPRyegrass].RemoveBiomass(amount: 1500,	type: "SetResidueAmount")
                2014-05-03  [AgPRyegrass].RemoveBiomass(amount: 1500,	type: "SetResidueAmount")
              Operations FertiliserSchedule
                2011-03-25  [Fertiliser].Apply(amount:40 , type:NO3N)
                2011-08-12  [Fertiliser].Apply(amount:100, type:NO3N)
                2011-10-01  [Fertiliser].Apply(amount:100, type:NO3N)
                2011-11-02  [Fertiliser].Apply(amount:122, type:NO3N)
                2011-12-05  [Fertiliser].Apply(amount:79 , type:NO3N)
                2011-12-29  [Fertiliser].Apply(amount:81 , type:NO3N)
                2012-02-01  [Fertiliser].Apply(amount:100, type:NO3N)
                2012-03-02  [Fertiliser].Apply(amount:115, type:NO3N)
                2012-04-10  [Fertiliser].Apply(amount:102, type:NO3N)
                2012-09-11  [Fertiliser].Apply(amount:100, type:NO3N)
                2012-10-18  [Fertiliser].Apply(amount:102, type:NO3N)
                2012-11-29  [Fertiliser].Apply(amount:115, type:NO3N)
                2013-01-14  [Fertiliser].Apply(amount:81 , type:NO3N)
                2013-02-28  [Fertiliser].Apply(amount:93 , type:NO3N)
                2013-04-02  [Fertiliser].Apply(amount:84 , type:NO3N)
                2013-09-12  [Fertiliser].Apply(amount:100, type:NO3N)
                2013-10-14  [Fertiliser].Apply(amount:81 , type:NO3N)
                2013-12-24  [Fertiliser].Apply(amount:71 , type:NO3N)
                2014-02-28  [Fertiliser].Apply(amount:117, type:NO3N)
                2014-04-04  [Fertiliser].Apply(amount:74 , type:NO3N)
              Operations IrrigationEvents
        Folder Thinzar
          Experiment
            Factors
              Permutation
                Factor Ferilisation
                  CompositeFactor LincolnNMinus
                    Specifications:
                      [FertilisationEvents]
                      [DefoliationSchedule]
                    Operations FertilisationEvents
                      2017-03-23  [Fertiliser].Apply(amount: 50, type: "UreaN")
                      2017-04-01  [Fertiliser].Apply(amount: 0, type: "UreaN")
                      2025-08-08  [Fertiliser].Apply(amount: 0, type: "UreaN")
                      2017-09-22  [Fertiliser].Apply(amount: 0, type: "UreaN")
                      2017-10-27  [Fertiliser].Apply(amount: 0, type: "UreaN")
                      2017-12-08  [Fertiliser].Apply(amount: 0, type: "UreaN")
                      2018-01-22  [Fertiliser].Apply(amount: 0, type: "UreaN")
                      2018-02-21  [Fertiliser].Apply(amount: 0, type: "UreaN")
                      2018-03-28  [Fertiliser].Apply(amount: 0, type: "UreaN")
                      2018-05-23  [Fertiliser].Apply(amount: 0, type: "UreaN")
                      2018-08-10  [Fertiliser].Apply(amount: 0, type: "UreaN")
                      2018-09-26  [Fertiliser].Apply(amount: 0, type: "UreaN")
                      2018-11-04  [Fertiliser].Apply(amount: 0, type: "UreaN")
                      2018-12-14  [Fertiliser].Apply(amount: 0, type: "UreaN")
                      2019-01-25  [Fertiliser].Apply(amount: 0, type: "UreaN")
                      2019-02-28  [Fertiliser].Apply(amount: 0, type: "UreaN")
                      2019-04-08  [Fertiliser].Apply(amount: 0, type: "UreaN")
                      2019-05-27  [Fertiliser].Apply(amount: 0, type: "UreaN")
                      2019-08-09  [Fertiliser].Apply(amount: 0, type: "UreaN")
                      2019-09-23  [Fertiliser].Apply(amount: 0, type: "UreaN")
                      2019-11-08  [Fertiliser].Apply(amount: 0, type: "UreaN")
                      2019-12-22  [Fertiliser].Apply(amount: 0, type: "UreaN")
                      2020-01-23  [Fertiliser].Apply(amount: 0, type: "UreaN")
                      2020-02-26  [Fertiliser].Apply(amount: 0, type: "UreaN")
                      2020-04-08  [Fertiliser].Apply(amount: 0, type: "UreaN")
                      2020-06-10  [Fertiliser].Apply(amount: 0, type: "UreaN")
                      2020-08-10  [Fertiliser].Apply(amount: 0, type: "UreaN")
                      2020-10-02  [Fertiliser].Apply(amount: 0, type: "UreaN")
                      2020-11-04  [Fertiliser].Apply(amount: 0, type: "UreaN")
                      2020-12-14  [Fertiliser].Apply(amount: 0, type: "UreaN")
                      2021-01-25  [Fertiliser].Apply(amount: 0, type: "UreaN")
                      2021-03-01  [Fertiliser].Apply(amount: 0, type: "UreaN")
                      2021-04-05  [Fertiliser].Apply(amount: 0, type: "UreaN")
                    Operations DefoliationSchedule
                      2018-08-06  [Ryegrass].RemoveBiomass(amount: 345.623859603095,type: "SetResidueAmount")
                      2018-09-23  [Ryegrass].RemoveBiomass(amount: 45.3333,type: "SetResidueAmount")
                      2018-11-02  [Ryegrass].RemoveBiomass(amount: 66.6667,type: "SetResidueAmount")
                      2018-12-10  [Ryegrass].RemoveBiomass(amount: 272.1795,type: "SetResidueAmount")
                      2019-01-21  [Ryegrass].RemoveBiomass(amount: 266.1332,type: "SetResidueAmount")
                      2019-02-26  [Ryegrass].RemoveBiomass(amount: 156.1741,type: "SetResidueAmount")
                      2019-04-04  [Ryegrass].RemoveBiomass(amount: 130.6667,type: "SetResidueAmount")
                      2019-05-24  [Ryegrass].RemoveBiomass(amount:140.5,type: "SetResidueAmount")
                      2019-08-06  [Ryegrass].RemoveBiomass(amount: 266.6667,type: "SetResidueAmount")
                      2019-09-23  [Ryegrass].RemoveBiomass(amount: 235,type: "SetResidueAmount")
                      2019-10-31  [Ryegrass].RemoveBiomass(amount: 87.8333,type: "SetResidueAmount")
                      2019-12-16  [Ryegrass].RemoveBiomass(amount: 266.333,type: "SetResidueAmount")
                      2020-01-21  [Ryegrass].RemoveBiomass(amount: 593,type: "SetResidueAmount")
                      2020-02-24  [Ryegrass].RemoveBiomass(amount: 379.5833,type: "SetResidueAmount")
                      2020-04-06  [Ryegrass].RemoveBiomass(amount: 379.583,type: "SetResidueAmount")
                      2020-06-08  [Ryegrass].RemoveBiomass(amount: 237.833,type: "SetResidueAmount")
                      2020-08-07  [Ryegrass].RemoveBiomass(amount: 288.5 ,type: "SetResidueAmount")
                      2020-09-30  [Ryegrass].RemoveBiomass(amount: 284.6,type: "SetResidueAmount")
                      2020-11-02  [Ryegrass].RemoveBiomass(amount: 328.66,type: "SetResidueAmount")
                      2020-12-10  [Ryegrass].RemoveBiomass(amount: 787.1666,type: "SetResidueAmount")
                      2021-01-21  [Ryegrass].RemoveBiomass(amount: 451.833,type: "SetResidueAmount")
                      2021-02-25  [Ryegrass].RemoveBiomass(amount: 599.5 ,type: "SetResidueAmount")
                      2021-04-01  [Ryegrass].RemoveBiomass(amount: 630.0333 ,type: "SetResidueAmount")
                  CompositeFactor LincolnNPlus
                    Specifications:
                      [FertilisationEvents]
                      [DefoliationSchedule]
                    Operations FertilisationEvents
                      2017-03-23  [Fertiliser].Apply(amount: 50, type: "UreaN")
                      2017-04-01  [Fertiliser].Apply(amount: 25, type: "UreaN")
                      2025-08-08  [Fertiliser].Apply(amount: 25, type: "UreaN")
                      2017-09-22  [Fertiliser].Apply(amount: 25, type: "UreaN")
                      2017-10-27  [Fertiliser].Apply(amount: 25, type: "UreaN")
                      2017-12-08  [Fertiliser].Apply(amount: 25, type: "UreaN")
                      2018-01-22  [Fertiliser].Apply(amount: 25, type: "UreaN")
                      2018-02-21  [Fertiliser].Apply(amount: 25, type: "UreaN")
                      2018-03-28  [Fertiliser].Apply(amount: 25, type: "UreaN")
                      2018-05-23  [Fertiliser].Apply(amount: 25, type: "UreaN")
                      2018-08-10  [Fertiliser].Apply(amount: 25, type: "UreaN")
                      2018-09-26  [Fertiliser].Apply(amount: 25, type: "UreaN")
                      2018-11-04  [Fertiliser].Apply(amount: 25, type: "UreaN")
                      2018-12-14  [Fertiliser].Apply(amount: 25, type: "UreaN")
                      2019-01-25  [Fertiliser].Apply(amount: 25, type: "UreaN")
                      2019-02-28  [Fertiliser].Apply(amount: 25, type: "UreaN")
                      2019-04-08  [Fertiliser].Apply(amount: 25, type: "UreaN")
                      2019-05-27  [Fertiliser].Apply(amount: 25, type: "UreaN")
                      2019-08-09  [Fertiliser].Apply(amount: 25, type: "UreaN")
                      2019-09-23  [Fertiliser].Apply(amount: 25, type: "UreaN")
                      2019-11-08  [Fertiliser].Apply(amount: 25, type: "UreaN")
                      2019-12-22  [Fertiliser].Apply(amount: 25, type: "UreaN")
                      2020-01-23  [Fertiliser].Apply(amount: 25, type: "UreaN")
                      2020-02-26  [Fertiliser].Apply(amount: 25, type: "UreaN")
                      2020-04-08  [Fertiliser].Apply(amount: 25, type: "UreaN")
                      2020-06-10  [Fertiliser].Apply(amount: 25, type: "UreaN")
                      2020-08-10  [Fertiliser].Apply(amount: 25, type: "UreaN")
                      2020-10-02  [Fertiliser].Apply(amount: 25, type: "UreaN")
                      2020-11-04  [Fertiliser].Apply(amount: 25, type: "UreaN")
                      2020-12-14  [Fertiliser].Apply(amount: 25, type: "UreaN")
                      2021-01-25  [Fertiliser].Apply(amount: 25, type: "UreaN")
                      2021-03-01  [Fertiliser].Apply(amount: 25, type: "UreaN")
                      2021-04-05  [Fertiliser].Apply(amount: 25, type: "UreaN")
                    Operations DefoliationSchedule
                      2018-08-06  [Ryegrass].RemoveBiomass(amount: 297.0662 ,type: "SetResidueAmount")
                      2018-09-23  [Ryegrass].RemoveBiomass(amount: 45.8333,type: "SetResidueAmount")
                      2018-11-02  [Ryegrass].RemoveBiomass(amount: 54 ,type: "SetResidueAmount")
                      2018-12-10  [Ryegrass].RemoveBiomass(amount: 252.8708,type: "SetResidueAmount")
                      2019-01-21  [Ryegrass].RemoveBiomass(amount: 383.8988  ,type: "SetResidueAmount")
                      2019-02-26  [Ryegrass].RemoveBiomass(amount: 139.04  ,type: "SetResidueAmount")
                      2019-04-04  [Ryegrass].RemoveBiomass(amount: 139.8333 ,type: "SetResidueAmount")
                      2019-05-24  [Ryegrass].RemoveBiomass(amount: 215.5  ,type: "SetResidueAmount")
                      2019-08-06  [Ryegrass].RemoveBiomass(amount: 306.66,type: "SetResidueAmount")
                      2019-09-23  [Ryegrass].RemoveBiomass(amount: 274.8333  ,type: "SetResidueAmount")
                      2019-10-31  [Ryegrass].RemoveBiomass(amount: 111, type: "SetResidueAmount")
                      2019-12-16  [Ryegrass].RemoveBiomass(amount: 306.666,type: "SetResidueAmount")
                      2020-01-21  [Ryegrass].RemoveBiomass(amount: 656.33 ,type: "SetResidueAmount")
                      2020-02-24  [Ryegrass].RemoveBiomass(amount: 359.33 ,type: "SetResidueAmount")
                      2020-04-06  [Ryegrass].RemoveBiomass(amount: 507.833,type: "SetResidueAmount")
                      2020-06-08  [Ryegrass].RemoveBiomass(amount: 597.0,type: "SetResidueAmount")
                      2020-08-07  [Ryegrass].RemoveBiomass(amount: 325,type: "SetResidueAmount")
                      2020-09-30  [Ryegrass].RemoveBiomass(amount: 224.333,type: "SetResidueAmount")
                      2020-11-02  [Ryegrass].RemoveBiomass(amount: 214.66,type: "SetResidueAmount")
                      2020-12-10  [Ryegrass].RemoveBiomass(amount: 855.55,type: "SetResidueAmount")
                      2021-01-21  [Ryegrass].RemoveBiomass(amount: 232.8,type: "SetResidueAmount")
                      2021-02-25  [Ryegrass].RemoveBiomass(amount:  876.33,type: "SetResidueAmount")
                      2021-04-01  [Ryegrass].RemoveBiomass(amount: 879.5 ,type: "SetResidueAmount")
            Simulation Lincoln
              Clock: Start=2017-03-01; End=2021-06-30
              Weather: FileName=Lincoln_23.met
              Summary summaryfile
              SoilArbitrator Soil Arbitrator
              MicroClimate: a_interception=0; b_interception=1; c_interception=0; d_interception=0; SoilHeatFluxFraction=0.4; MinimumHeightDiffForNewLayer=0; NightInterceptionFraction=0.5; ReferenceHeight=2
              Zone Field: Area=1; Slope=0; AspectAngle=0; Altitude=50
                Soil Silt clay loam (Lincoln No1414): SoilType=Silt clay loam; LocalName=Wakanui; Site=Canterbury Agriculture and Science Centre; NearestTown=Lincoln; Region=Canterbury; Country=New Zealand; ApsoilNumber=1414; Latitude=-43.638; Longitude=172.474; LocationAccuracy=+/-50 m; YearOfSampling=1988
                  DataSource=The database of New Zealand soils was compiled by AgResearch (www.agresearch.co.nz) and based on soil properties gathered, mainly from publications, in the course of conducting several simulation-based research projects but particularly from the Pastoral 21 Environment program which was funded by the New Zealand Ministry for Business, Innovation and Employment,  Dairy NZ, Fonterra and Meat & Wool NZ.
                  Comments=The data is a combination of published or supplied measurements, pedotransfer functions, and expert opinion. See Cichota et al. (2013; Soil Research 51: 92-111, http://dx.doi.org/10.1071/SR12338) for a description of the pedotransfer functions. The soil carbon and fresh organic matter settings have been set as those broadly appropriate for permanent productive pastoral systems, see Cichota el al. (2012; Soil Research 50: 694-707, http://dx.doi.org/10.1071/SR12208). Users should take care to adapt these to local conditions before using the data in simulations. FOM values estimated to be 900 kg/ha of FOM in top 600mm of soil and another 100 kg/ha below. Soil C:N ratios taken from soil Silt clay loam (Ashburton NoXXXX).
                  Physical
                    Thickness  ParticleSizeSand  ParticleSizeSilt  ParticleSizeClay  Rocks  BD     AirDry  LL15   DUL    SAT    KS
                    90         5.333             67.001            27.667            0      1.203  0.061   0.185  0.356  0.511  1282.394
                    90         5.21              67.29             27.5              0      1.275  0.062   0.188  0.362  0.485  309.644
                    80         5.708             66.292            28                0      1.27   0.063   0.192  0.37   0.487  64.122
                    100        2.857             65.143            32                0      1.515  0.074   0.224  0.338  0.417  7.192
                    140        1.879             68.121            30                0      1.605  0.073   0.221  0.333  0.387  5.255
                    190        0.968             69.032            30                0      1.535  0.073   0.221  0.348  0.411  5.691
                    260        8.998             77.002            14                0      1.566  0.049   0.147  0.304  0.399  9.235
                    100        16.927            69.073            14                0      1.598  0.03    0.09   0.259  0.394  10.04
                    150        69.98             23.02             7                 0      1.55   0.016   0.05   0.217  0.415  150.652
                    300        13.705            60.295            26                0      1.574  0.055   0.166  0.323  0.401  7.564
                    BD source: Field measured and checked for sensibility
                    AirDry source: Estimated based on local knowledge
                    LL15, DUL source: Laboratory measured
                    SAT source: Calculated from measured, estimated or calculated BD
                    SoilCrop wheatSoil
                      LL=[0.185, 0.188, 0.192, 0.224, 0.221, 0.221, 0.147, 0.09, 0.05, 0.166]
                      KL=[0.06, 0.06, 0.06, 0.06, 0.06, 0.051, 0.04, 0.04, 0.04, 0.02]
                      XF=[1, 1, 1, 1, 1, 1, 1, 1, 1, 1]
                      LL source: Estimated based on local knowledge
                    SoilCrop perennialgrassSoil: same as Validation.NewZealand.Lincoln.Thinzar.Experiment.Lincoln.Field.Silt clay loam (Lincoln No1414).Physical.wheatSoil
                    SoilCrop SCRUMSoil: same as Validation.NewZealand.Lincoln.Thinzar.Experiment.Lincoln.Field.Silt clay loam (Lincoln No1414).Physical.wheatSoil
                    SoilCrop RyegrassSoil: same as Validation.Australia.Mutdapilly9294.Mutdapilly9294Base.Field.Soil.Physical.AGPRyegrassSoil
                  WaterBalance SoilWater: SummerDate=1-nov; SummerU=6; SummerCona=3.5; WinterDate=1-apr; WinterU=2; WinterCona=2; DiffusConst=88; DiffusSlope=35; Salb=0.13; CN2Bare=73; CNRed=20; CNCov=0.8; DischargeWidth=0; CatchmentArea=0; PSIDul=-100; Thickness=[90, 90, 80, 100, 140, 190, 260, 100, 150, 300]
                    SWCON=[0.587, 0.554, 0.494, 0.325, 0.293, 0.238, 0.2, 0.297, 0.458, 0.185]
                  Organic: FOMCNRatio=40; CarbonUnits=Total
                    Thickness  Carbon  SoilCNRatio  FBiom  FInert  FOM
                    90         2.867   11.715       0.08   0.289   30.9257
                    90         2.55    11.715       0.066  0.467   25.8313
                    80         2.3     11.715       0.032  0.728   22.012
                    100        0.62    11.715       0.012  0.728   18.0219
                    140        0.31    11.715       0.008  0.839   13.6207
                    190        0.25    11.715       0.008  0.93    9.31464
                    260        0.18    11.715       0.008  0.961   5.53774
                    100        0.15    11.715       0.008  0.985   4.53392
                    150        0.12    11.715       0.008  0.986   3.35881
                    300        0.14    11.715       0.008  0.989   1.84335
                  Chemical: PHUnits=Water
                    Thickness  PH   CEC
                    90         6.5  14.83
                    90         6.5  14.55
                    80         6.5  14.2
                    100        6.5  10.3
                    140        6.5  13
                    190        6.5  13.7
                    260        6.5  8.8
                    100        6.5  9
                    150        6.5  6
                    300        6.5  11.2
                    CEC source: Measured
                    PH source: Estimated based on local knowledge
                  Nutrient
                  Solute NO3: InitialValuesUnits=ppm; WaterTableConcentration=0; D0=0; DepthConstant=0; MaxDepthSoluteAccessible=0; RunoffEffectivenessAtMovingSolute=0; MaxEffectiveRunoff=0
                  Solute NH4: InitialValuesUnits=ppm; WaterTableConcentration=0; D0=0; DepthConstant=0; MaxDepthSoluteAccessible=0; RunoffEffectivenessAtMovingSolute=0; MaxEffectiveRunoff=0
                  Solute Urea: Thickness=[90, 90, 80, 100, 140, 190, 260, 100, 150, 300]; InitialValues=[0, 0, 0, 0, 0, 0, 0, 0, 0, 0]; InitialValuesUnits=kg/ha; WaterTableConcentration=0; D0=0; DepthConstant=0; MaxDepthSoluteAccessible=0; RunoffEffectivenessAtMovingSolute=0; MaxEffectiveRunoff=0
                  Water: Thickness=[90, 90, 80, 100, 140, 190, 260, 100, 150, 300]; FilledFromTop=false
                    InitialValues=[0.356, 0.362, 0.37, 0.338, 0.333, 0.348, 0.304, 0.259, 0.217, 0.323]
                  SoilTemperature Temperature
                Operations IrrigationEvents
                  2017-11-15  [Irrigation].Apply(25)
                  2017-11-18  [Irrigation].Apply(25)
                  2017-12-07  [Irrigation].Apply(25)
                  2017-12-08  [Irrigation].Apply(25)
                  2017-12-12  [Irrigation].Apply(25)
                  2017-12-13  [Irrigation].Apply(25)
                  2017-12-14  [Irrigation].Apply(25)
                  2017-12-15  [Irrigation].Apply(25)
                  2018-01-24  [Irrigation].Apply(25)
                  2018-01-25  [Irrigation].Apply(25)
                  2018-11-05  [Irrigation].Apply(25)
                  2018-11-06  [Irrigation].Apply(25)
                  2018-12-12  [Irrigation].Apply(25)
                  2018-12-16  [Irrigation].Apply(25)
                  2019-01-07  [Irrigation].Apply(25)
                  2019-01-09  [Irrigation].Apply(25)
                  2019-01-26  [Irrigation].Apply(25)
                  2019-01-28  [Irrigation].Apply(25)
                  2019-02-08  [Irrigation].Apply(25)
                  2019-02-10  [Irrigation].Apply(25)
                  2019-03-05  [Irrigation].Apply(25)
                  2019-03-07  [Irrigation].Apply(25)
                  2019-11-18  [Irrigation].Apply(25)
                  2019-11-19  [Irrigation].Apply(25)
                  2019-11-26  [Irrigation].Apply(25)
                  2019-12-03  [Irrigation].Apply(25)
                  2019-12-17  [Irrigation].Apply(25)
                  2020-01-07  [Irrigation].Apply(25)
                  2020-01-08  [Irrigation].Apply(25)
                  2020-01-22  [Irrigation].Apply(25)
                  2020-02-24  [Irrigation].Apply(25)
                  2020-03-05  [Irrigation].Apply(25)
                  2020-03-06  [Irrigation].Apply(25)
                  2020-03-20  [Irrigation].Apply(25)
                  2020-03-21  [Irrigation].Apply(25)
                  2020-03-22  [Irrigation].Apply(25)
                  2020-03-23  [Irrigation].Apply(25)
                  2020-03-25  [Irrigation].Apply(25)
                  2020-03-26  [Irrigation].Apply(25)
                  2020-04-30  [Irrigation].Apply(25)
                  2020-05-01  [Irrigation].Apply(25)
                  2020-10-02  [Irrigation].Apply(25)
                  2020-10-04  [Irrigation].Apply(25)
                  2020-10-19  [Irrigation].Apply(25)
                  2020-10-20  [Irrigation].Apply(25)
                  2020-11-10  [Irrigation].Apply(25)
                  2020-11-11  [Irrigation].Apply(25)
                  2020-12-11  [Irrigation].Apply(25)
                  2020-12-12  [Irrigation].Apply(25)
                  2020-12-17  [Irrigation].Apply(25)
                  2020-12-18  [Irrigation].Apply(25)
                  2021-01-22  [Irrigation].Apply(25)
                  2021-01-24  [Irrigation].Apply(25)
                  2021-02-02  [Irrigation].Apply(25)
                  2021-02-03  [Irrigation].Apply(25)
                  2021-02-15  [Irrigation].Apply(25)
                  2021-02-16  [Irrigation].Apply(25)
                  2021-03-01  [Irrigation].Apply(25)
                  2021-03-02  [Irrigation].Apply(25)
                  2021-03-15  [Irrigation].Apply(25)
                  2021-03-16  [Irrigation].Apply(25)
                  2021-04-07  [Irrigation].Apply(25)
                  2021-04-08  [Irrigation].Apply(25)
                Operations FertilisationEvents
                Irrigation
                Fertiliser
                SurfaceOrganicMatter: InitialResidueName=grass; InitialResidueType=grass; InitialResidueMass=1000; InitialStandingFraction=0; InitialCPR=0; InitialCNR=25
                PastureSpecies Ryegrass: doyGermination=275; daysEmergenceToAnthesis=120; daysAnthesisToMaturity=85; degreesDayForAnthesis=1100; degreesDayForMaturity=900; daysAnnualsFactor=45; CanopyType=PastureSpecies; InitialShootDM=0; InitialRootDM=0; InitialRootDepth=1000; initialDMFractionsGrasses=[0.15, 0.25, 0.25, 0.05, 0.05, 0.1, 0.1, 0.05, 0, 0, 0]; initialDMFractionsForbs=[0.2, 0.2, 0.15, 0.05, 0.1, 0.15, 0.1, 0.05, 0, 0, 0]; PhotosyntheticEfficiency=0.01; PhotosynthesisCurveFactor=0.8; FractionPAR=0.5; ReferenceCO2=380; CO2EffectScaleFactor=700; CO2EffectOffsetFactor=600; CO2EffectMinimum=0.7; CO2EffectExponent=2; ReproSeasonDurationCoeff=2; ReproSeasonShouldersLengthFactor=1; ReproSeasonOnsetDurationFactor=0.6; RelativeTurnoverEmerging=2; DetachmentDroughtCoefficient=3; DetachmentDroughtEffectMin=0.1; TurnoverStockFactor=0.01; TurnoverDefoliationEffectMin=0.025; MinimumGreenLeafProp=0.8; MinimumGreenRootProp=0.5; ResourceName=AGPRyegrass
                  initialDMFractionsLegumes=[0.16, 0.23, 0.22, 0.05, 0.03, 0.05, 0.05, 0.01, 0.04, 0.08, 0.08]
                  LinearInterpolationFunction FVPDFunction
                Report: EventNames=[Clock].EndOfDay
                  VariableNames:
                    [Clock].Today
                    [Ryegrass].Harvestable.wt
                    [Ryegrass].AboveGround.Wt
                    [Ryegrass].HarvestedWt/10
                    [Ryegrass].LAI
                    [Ryegrass].AboveGroundCrudeProtein
                    [Ryegrass].AboveGroundNConc
                    [Ryegrass].Width
                Operations DefoliationSchedule
                Operations Sow
                  2017-03-31  [Ryegrass].Sow(population: 120, cultivar: "P Ryegrass", depth: 30, rowSpacing: 250);
          Experiment SimpleGrazing
            Factors
              Permutation
                Factor Ferilisation
                  CompositeFactor LincolnNMinus
                    Specifications:
                      [FertilisationEvents]
                      [DefoliationSchedule]
                    Operations FertilisationEvents: same as Validation.NewZealand.Lincoln.Thinzar.Experiment.Factors.Permutation.Ferilisation.LincolnNMinus.FertilisationEvents
                    Operations DefoliationSchedule
                      2018-08-06  [SimpleGrazing].GrazeToResidual(345.623859603095)
                      2018-09-23  [SimpleGrazing].GrazeToResidual(45.3333)
                      2018-11-02  [SimpleGrazing].GrazeToResidual(66.6667)
                      2018-12-10  [SimpleGrazing].GrazeToResidual(272.1795)
                      2019-01-21  [SimpleGrazing].GrazeToResidual(266.1332)
                      2019-02-26  [SimpleGrazing].GrazeToResidual(156.1741)
                      2019-04-04  [SimpleGrazing].GrazeToResidual(130.6667)
                      2019-05-24  [SimpleGrazing].GrazeToResidual(140.5)
                      2019-08-06  [SimpleGrazing].GrazeToResidual(266.6667)
                      2019-09-23  [SimpleGrazing].GrazeToResidual(235)
                      2019-10-31  [SimpleGrazing].GrazeToResidual(87.8333)
                      2019-12-16  [SimpleGrazing].GrazeToResidual(266.333)
                      2020-01-21  [SimpleGrazing].GrazeToResidual(593)
                      2020-02-24  [SimpleGrazing].GrazeToResidual(379.5833)
                      2020-04-06  [SimpleGrazing].GrazeToResidual(379.583)
                      2020-06-08  [SimpleGrazing].GrazeToResidual(237.833)
                      2020-08-07  [SimpleGrazing].GrazeToResidual(288.5 )
                      2020-09-30  [SimpleGrazing].GrazeToResidual(284.6)
                      2020-11-02  [SimpleGrazing].GrazeToResidual(328.66)
                      2020-12-10  [SimpleGrazing].GrazeToResidual(787.1666)
                      2021-01-21  [SimpleGrazing].GrazeToResidual(451.833)
                      2021-02-25  [SimpleGrazing].GrazeToResidual(599.5)
                      2021-04-01  [SimpleGrazing].GrazeToResidual(630.0333)
                  CompositeFactor LincolnNPlus
                    Specifications:
                      [FertilisationEvents]
                      [DefoliationSchedule]
                    Operations FertilisationEvents: same as Validation.NewZealand.Lincoln.Thinzar.Experiment.Factors.Permutation.Ferilisation.LincolnNPlus.FertilisationEvents
                    Operations DefoliationSchedule
                      2018-08-06  [SimpleGrazing].GrazeToResidual(297.0662)
                      2018-09-23  [SimpleGrazing].GrazeToResidual(45.8333)
                      2018-11-02  [SimpleGrazing].GrazeToResidual(54)
                      2018-12-10  [SimpleGrazing].GrazeToResidual(252.8708)
                      2019-01-21  [SimpleGrazing].GrazeToResidual(383.8988)
                      2019-02-26  [SimpleGrazing].GrazeToResidual(139.04)
                      2019-04-04  [SimpleGrazing].GrazeToResidual(139.8333)
                      2019-05-24  [SimpleGrazing].GrazeToResidual(215.5)
                      2019-08-06  [SimpleGrazing].GrazeToResidual(306.66)
                      2019-09-23  [SimpleGrazing].GrazeToResidual(274.8333)
                      2019-10-31  [SimpleGrazing].GrazeToResidual(111)
                      2019-12-16  [SimpleGrazing].GrazeToResidual(306.666)
                      2020-01-21  [SimpleGrazing].GrazeToResidual(656.33)
                      2020-02-24  [SimpleGrazing].GrazeToResidual(359.33)
                      2020-04-06  [SimpleGrazing].GrazeToResidual(507.833)
                      2020-06-08  [SimpleGrazing].GrazeToResidual(597.0)
                      2020-08-07  [SimpleGrazing].GrazeToResidual(325)
                      2020-09-30  [SimpleGrazing].GrazeToResidual(224.333)
                      2020-11-02  [SimpleGrazing].GrazeToResidual(214.66)
                      2020-12-10  [SimpleGrazing].GrazeToResidual(855.55)
                      2021-01-21  [SimpleGrazing].GrazeToResidual(232.8)
                      2021-02-25  [SimpleGrazing].GrazeToResidual(876.33)
                      2021-04-01  [SimpleGrazing].GrazeToResidual(879.5)
            Simulation LincolnSimpleGrazing
              Clock: Start=2017-03-01; End=2021-06-30
              Weather: FileName=Lincoln_23.met
              Summary summaryfile
              SoilArbitrator Soil Arbitrator
              Forages
                Parameters:
                  Name                          LiveDigestibility  DeadDigestibility  LiveFractionConsumable  DeadFractionConsumable  LiveMinimumBiomass  DeadMinimumBiomass
                  SurfaceOrganicMatter.Residue  0                  0                  0                       0                       0                   0
                  Ryegrass.Leaf                 0.7                0.3                1                       1                       80                  0
                  Ryegrass.Stem                 0.7                0.3                1                       1                       20                  0
                  Ryegrass.Stolon               0.7                0.3                1                       1                       0                   0
                  AGPWhiteClover.Leaf           0.7                0.3                1                       1                       60                  0
                  AGPWhiteClover.Stem           0.7                0.3                1                       1                       15                  0
                  AGPWhiteClover.Stolon         0.7                0.3                1                       1                       10                  0
                  AGPPaspalum.Leaf              0.7                0.3                1                       1                       40                  0
                  AGPPaspalum.Stem              0.7                0.3                1                       1                       10                  0
                  AGPPaspalum.Stolon            0.7                0.3                1                       1                       0                   0
              MicroClimate: a_interception=0; b_interception=1; c_interception=0; d_interception=0; SoilHeatFluxFraction=0.4; MinimumHeightDiffForNewLayer=0; NightInterceptionFraction=0.5; ReferenceHeight=2
              Zone Field: Area=1; Slope=0; AspectAngle=0; Altitude=50
                Soil Silt clay loam (Lincoln No1414): same as Validation.NewZealand.Lincoln.Thinzar.Experiment.Lincoln.Field.Silt clay loam (Lincoln No1414)
                Operations IrrigationEvents: same as Validation.NewZealand.Lincoln.Thinzar.Experiment.Lincoln.Field.IrrigationEvents
                Operations FertilisationEvents
                Irrigation
                Fertiliser
                SurfaceOrganicMatter: InitialResidueName=grass; InitialResidueType=grass; InitialResidueMass=1000; InitialStandingFraction=0; InitialCPR=0; InitialCNR=25
                PastureSpecies Ryegrass: same as Validation.NewZealand.Lincoln.Thinzar.Experiment.Lincoln.Field.Ryegrass
                Report: EventNames=[Clock].EndOfDay
                  VariableNames:
                    [Clock].Today
                    [Ryegrass].Harvestable.wt
                    [Ryegrass].AboveGround.Wt
                    [Ryegrass].HarvestedWt/10
                    [Ryegrass].LAI
                    [Ryegrass].AboveGroundCrudeProtein
                    [Ryegrass].AboveGroundNConc
                    [SimpleGrazing].DaysSinceGraze
                Operations DefoliationSchedule
                Operations Sow
                  2017-03-31  [Ryegrass].Sow(population: 120, cultivar: "P Ryegrass", depth: 30, rowSpacing: 250);
                SimpleGrazing: GrazingRotationType=2; SimpleMinGrazable=3500; SimpleGrazingResidual=350; FlexibleGrazePostDM=0; NoGrazingStartString=1-mar; NoGrazingEndString=1-jun; IsCutAndCarry=true; FractionClippingsReturned=0; FractionIntakeNToAnimal=[0]; DungNConc=2.6; FractionOfDungUrineOffPaddock=[0]; DepthUrineIsAdded=0; ShowAdvancedExcretaOptions=false; SendDungElsewhere=0; SendUrineElsewhere=0; UsePatching=false; PseudoPatches=true; ZoneCount=25; UrineReturnPattern=2; PseudoRandomSeed=666; MaxEffectiveNConcentration=3.5; FractionPopulationDecline=0; TramplingOn=false; MaximumPropLitterMovedToSoil=0.1; PastureConsumedAtMaximumRateOfLitterRemoval=1200
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