Simulations: Version=147
  DataStore
  Replacements
    Plant SPRUM: PlantType=SPRUM; IsAlive=false; IsEnding=false; DaysAfterEnding=0
      Memo TitlePage
        # SPRUM: the Simple Crop Resource Uptake Model

        _Hamish Brown and Rob Zyskowski, Plant and Food Research, New Zealand_

        This model has been built using the Plant Modelling Framework (PMF) of [brown_plant_2014] to simulate a range of different crops in simulations where water and nitrogen balance are of interest but a fully mechanistic plant model is not needed or is not available. It is a daily time step implementation of the crop model that is used on the Overseer nutrient balance model [Cichota_etal_2010].  It uses simple sigmoidal functions for estimating daily cover and biomass deltas to give realistic water and nitrogen demands. It does not simulate potential yield, this is specified as an input. Yield will be reduced below the specified potential yield if N or water supplies from the soil are insufficient to meet demand. The model has been paramaterised for simulating water and nitrogen balances of cropping rotations in New Zealand (where over 50 different crop types are grown and it is not feasible to produce full crop models for each of these).  Because of this the model is not as generically applicable as full APSIM crop models.   It may be adapted for other purposes and other crop types may be added but the user will need to keep in mind that because it is a simple model the the parameters might need changing for crops in different locations or for crops sown at different times of the year.  Some sensibility testing or validation is recommended before application in different sutuations.

        SPRUM has a simple phenology model which divides the crop growth into three main phases; a vegetative phase when the canopy is expanding, a reproductive phase when product is being formed and a senescing phase when the canopy is contracting.  SPRUM has 4 organ classes to represent different biomass components and the real biomass components that these classes represent changes from crop to crop:
           1. A Simple leaf class called <b>Stover</b> which represents the unharvested parts of the plant.  Generally, this represents the leaf and stem components of the crop but for crops where stem and leaf are part of the harvested product (e.g forages and leafy vegetables) than stover is the residual fraction of leaf and stem that is not harvested.
           2. A Generic organ class called <b>Product</b> which represents the plant parts that are harvested and removed from the field.  This could represent grain, fruits, tubers, leaf or stem depending on what sort of crop is being represented.
           3. A Root organ which extracts water and nitrogen from the soil for plant growth and returns biomass to the soil on harvest
           4. A Nodule organ which is only activated and fixes nitrogen for the legume crops.
        An Arbitrator is also included which determines the allocation of drymatter and nitrogen biomass between each of these organs.

        #Inclusion in APSIM simulations
        A SPRUM crop is included in a simulation the same as any other APSIM crop
         * The SPRUM object needs to be dragged or copied from the Crop folder in the tool box into the field of your simulation.
         * It is then planted with a sowing rule
        ~~~
        SPRUM.Sow(cultivar: Wheat_Autumn, population: 1, depth: 10, rowSpacing: 150);
        ~~~
          * Note that SPRUM has no notion of population or rowSpacing but these parameters are required by the Sow method so filler values are provided
          * To specify an expected Expected Yield that differs to the defalt value provided, included the following code in a manager script to be executed on the day of sowing.
        ~~~
         zone.Set("[SPRUM].Product.ExpectedYield.Value()", ResetValue);
        ~~~
        * SPRUM can be Harvested, Cut, Grazed and Pruned like other crops.  Defalt proportions of the biomass in each organ are removed from the sysem and/or added to the fields residue pools.  Note that defalt removal fraction for product on harvest is 0 (becaue it is represented with a generic organ) so more appropriate removal fractions should be sepcified in a manager script as follows:
        ~~~
        [EventSubscribe("Commencing")]
        private void OnSimulationCommencing(object sender, EventArgs e)
        {
          Remove = new RemovalFractions(SPRUM.Organs);
        }
        [EventSubscribe("DoManagement")]
        private void OnDoManagement(object sender, EventArgs e)
        {
          if (Clock.Today.Date == HarvestDate2)
          {
            Remove.SetFractionLiveToRemove("Product", 1.0);
            Remove.SetFractionLiveToRemove("Stover", 0.05);
            Remove.SetFractionLiveToResidue("Stover",0.95)
            SPRUM.Harvest(Remove);
            SPRUM.EndCrop();
          }
        }
        ~~~
        * A Remove class as shown above can be sent with Harvest, Cut, Graze and Prune events to specificy the proportions of removals.
         * Once a crop has been ended the field is open to plant another crop using another APSIM crop model or sowing another SPRUM crop.
      Phenology
        HourlyInterpolation ThermalTime: agregationMethod=0
          Memo Description
            Progression through each of the phenological stages is driven by thermal time.  As temperature increases from zero to 30 degrees, development acelerates and then slows down again above 30 degress
          XYPairs Response: X=[1, 15, 30, 40]; Y=[0, 10, 25, 0]
          ThreeHourSin InterpolationMethod
        Memo Description1
          As ThermalTime accumulates the crop progresses through the following phases:
        StartPhase ReStart: Start=Grazing; End=PostGraze
        GenericPhase CanopyExpanding: Start=PostGraze; End=CanopyClosure
          Memo Description
            During this phase the plant only partitions biomass to Root and Stover (leaf and stem) Organs
          Constant Target: FixedValue=150; Units=<sup>o</sup>Cd
          VariableReference Progression: VariableName=[Phenology].ThermalTime
        GenericPhase FullCanopy: Start=CanopyClosure; End=Grazing
          Memo Description
            During this phase the plant is partitioning biomass to Root, Stover and Product organs.
          Constant Target: FixedValue=151; Units=<sup>o</sup>Cd
          VariableReference Progression: VariableName=[Phenology].ThermalTime
        GrazeAndRewind Graze: Start=Grazing; PhaseNameToGoto=ReStart
        GotoPhase (disabled): Start=Grazing; PhaseNameToGoto=ReStart
      OrganArbitrator Arbitrator
        BiomassTypeArbitrator DMArbitration
          Folder PotentialPartitioningMethods
            ReallocationMethod
            AllocateFixationMethod
            RetranslocationMethod
            SendPotentialDMAllocationsMethod
          Folder AllocationMethods
            NutrientConstrainedAllocationMethod
            DryMatterAllocationsMethod
          RelativeAllocation ArbitrationMethod
        BiomassTypeArbitrator NArbitration
          Folder PotentialPartitioningMethods
            ReallocationMethod
          Folder ActualPartitioningMethods
            AllocateFixationMethod
            RetranslocationMethod
          Folder AllocationMethods
            NitrogenAllocationsMethod
          RelativeAllocation ArbitrationMethod
          AllocateUptakesMethod
        WaterUptakeMethod
        NitrogenUptakeMethod
      GenericOrgan Product: IsAboveGround=true
        Memo Description
          It is the biomass that is removed from the crop at harvest and may include grain, root, leaf, stem, pod or any other organ type depending on the type of crop and how it is harvested.
        Constant MaximumNConc: FixedValue=0.05
        Constant MinimumNConc: FixedValue=0.02
        Constant NReallocationFactor: FixedValue=0
        Constant RemobilisationCost: FixedValue=0
        Constant SenescenceRate: FixedValue=0; Units=/d
        BiomassRemoval BiomassRemovalDefaults
          OrganBiomassRemovalType Harvest: FractionLiveToRemove=1; FractionDeadToRemove=0; FractionLiveToResidue=0; FractionDeadToResidue=0
          OrganBiomassRemovalType Cut: FractionLiveToRemove=1; FractionDeadToRemove=0; FractionLiveToResidue=0; FractionDeadToResidue=0
          OrganBiomassRemovalType Prune: FractionLiveToRemove=1; FractionDeadToRemove=0; FractionLiveToResidue=0; FractionDeadToResidue=0
          OrganBiomassRemovalType Graze: FractionLiveToRemove=1; FractionDeadToRemove=0; FractionLiveToResidue=0; FractionDeadToResidue=0
        Constant DetachmentRateFunction: FixedValue=0; Units=/d
        Constant MaintenanceRespirationFunction: FixedValue=0; Units=0-1
        Constant DMConversionEfficiency: FixedValue=1; Units=0-1
        Constant NRetranslocationFactor: FixedValue=0
        Constant NitrogenDemandSwitch: FixedValue=1
        Constant DMReallocationFactor: FixedValue=0
        Constant DMRetranslocationFactor: FixedValue=0
        VariableReference CriticalNConc: VariableName=[Product].MinimumNConc
        Constant CarbonConcentration: FixedValue=0.4
        BiomassDemandAndPriority DMDemands
          MultiplyFunction Structural
            PartitionFractionDemandFunction DMDemandFunction
              Constant PartitionFraction: FixedValue=0.75
                Memo Description
                  The proportion of total biomass in harvested product
            Constant StructuralFraction: FixedValue=1; Units=0-1
          Constant Metabolic: FixedValue=0
          StorageDMDemandFunction Storage
            SubtractFunction StorageFraction
              Constant One: FixedValue=1
              VariableReference StructuralFraction: VariableName=[Product].DMDemands.Structural.StructuralFraction
          Constant QStructuralPriority: FixedValue=1
          Constant QMetabolicPriority: FixedValue=1
          Constant QStoragePriority: FixedValue=1
        BiomassDemandAndPriority NDemands
          MultiplyFunction Structural
            VariableReference MinNconc: VariableName=[Product].minimumNconc
            VariableReference PotentialDMAllocation: VariableName=[Product].potentialDMAllocation.Structural
          MultiplyFunction Metabolic
            SubtractFunction MetabolicNconc
              VariableReference CritNconc: VariableName=[Product].criticalNConc
              VariableReference MinNconc: VariableName=[Product].minimumNconc
            VariableReference PotentialDMAllocation: VariableName=[Product].potentialDMAllocation.Structural
          StorageNDemandFunction Storage
            VariableReference NitrogenDemandSwitch: VariableName=[Product].nitrogenDemandSwitch
            VariableReference MaxNconc: VariableName=[Product].maximumNconc
          Constant QStructuralPriority: FixedValue=1
          Constant QMetabolicPriority: FixedValue=1
          Constant QStoragePriority: FixedValue=1
        RetranslocateNonStructural RetranslocateNitrogen
        BiomassDemand InitialWt
          Constant Structural: FixedValue=0; Units=g/m^2
          Constant Metabolic: FixedValue=0
          Constant Storage: FixedValue=0
        Constant Photosynthesis: FixedValue=0
        VariableReference initialNConcFunction: VariableName=[Product].MaximumNConc
      SimpleLeaf Stover: Albedo=0.18; Gsmax350=0.01; R50=150; LeafInitialisationStage=PostGraze; Height=0; BaseHeight=0; Width=0; FRGR=0; PotentialEP=0; WaterDemand=0; KDead=0; LAIDead=0
        Memo Description
          Stover represents any part of the crop that is not removed at harvest (i.e not part of the product).
        Constant StomatalConductanceCO2Modifier: FixedValue=1
        Constant NReallocationFactor: FixedValue=0
        Constant RemobilisationCost: FixedValue=0
        Constant SenescenceRate: FixedValue=0
        Constant DetachmentRate: FixedValue=0; Units=/d
        MultiplyFunction InitialWt
          Constant InitialPlantWt: FixedValue=0; Units=g/plant
          VariableReference Population: VariableName=[Plant].Population
        Constant LaiDead: FixedValue=0; Units=m^2/m^2
        MultiplyFunction Photosynthesis
          MultiplyFunction Potential
            Constant: FixedValue=1.1
            VariableReference Cover: VariableName=[Stover].Cover
            HourlyInterpolation ThermalTime: agregationMethod=0
              Memo Description
                Progression through each of the phenological stages is driven by thermal time.  As temperature increases from zero to 30 degrees, development acelerates and then slows down again above 30 degress
              XYPairs Response: X=[5, 30, 40]; Y=[0, 25, 0]
              ThreeHourSin InterpolationMethod
          LinearInterpolationFunction WaterStressFactor
            XYPairs: X=[0, 0, 0.5, 1]; Y=[0, 0, 1, 1]
            VariableReference XValue: VariableName=[Stover].Fw
        MinimumFunction FRGR
          HourlyInterpolation FRGRFunctionTemp: agregationMethod=0
            XYPairs Response: X=[0, 10, 25, 40]; Y=[0, 1, 1, 0]
            ThreeHourSin InterpolationMethod
        SigmoidFunction Cover
          Constant Ymax: FixedValue=0.97
          VariableReference XValue: VariableName=[Phenology].AccumulatedTT
          Constant Xo: FixedValue=0
          Constant b: FixedValue=50
        Constant ExtinctionCoefficient: FixedValue=0.5
          Memo Description
            The extinction coefficient is used to calculate a LAI value (needed by MicroClimate) from the canopy cover
        LinearInterpolationFunction Tallness
          XYPairs: X=[1, 3]; Y=[100, 300]
          VariableReference XValue: VariableName=[Phenology].Stage
        Constant MaximumNConc: FixedValue=0.01
        Constant MinimumNConc: FixedValue=0.005
        BiomassRemoval BiomassRemovalDefaults
          OrganBiomassRemovalType Harvest: FractionLiveToRemove=0; FractionDeadToRemove=0; FractionLiveToResidue=0.5; FractionDeadToResidue=0
          OrganBiomassRemovalType Cut: FractionLiveToRemove=0; FractionDeadToRemove=0; FractionLiveToResidue=0.5; FractionDeadToResidue=0
          OrganBiomassRemovalType Prune: FractionLiveToRemove=0; FractionDeadToRemove=0; FractionLiveToResidue=0.5; FractionDeadToResidue=0
          OrganBiomassRemovalType Graze: FractionLiveToRemove=0; FractionDeadToRemove=0; FractionLiveToResidue=0.5; FractionDeadToResidue=0
        Constant MaintenanceRespiration: FixedValue=0; Units=0-1
        Constant DMConversionEfficiency: FixedValue=1; Units=0-1
        Constant NRetranslocationFactor: FixedValue=0
        Constant DMReallocationFactor: FixedValue=0
        Constant DMRetranslocationFactor: FixedValue=0
        VariableReference CriticalNConc: VariableName=[Stover].MinimumNConc
        Constant CarbonConcentration: FixedValue=0.4
        BiomassDemandAndPriority DMDemands
          MultiplyFunction Structural
            PartitionFractionDemandFunction DMDemandFunction
              Memo Description
                DM demand is based on a simple partitioning coefficients.  At harvest the biomass partitioned to the stover = TotalDM * (1 - RootProportion) * (1 - Harvest index).  However the partitioningFraction is more complicated that this as it partitions more biomass to the stover in the CanopyExpanding Phase and less in the Yield increasing phase to give realistic patterns of accumulation of biomass in the Stover and Product over the duration of the crop
              Constant PartitionFraction: FixedValue=0.15
            Constant StructuralFraction: FixedValue=1; Units=0-1
          Constant Metabolic: FixedValue=0
          StorageDMDemandFunction Storage
            SubtractFunction StorageFraction
              Constant One: FixedValue=1
              VariableReference StructuralFraction: VariableName=[Stover].DMDemands.Structural.StructuralFraction
          Constant QStructuralPriority: FixedValue=1
          Constant QMetabolicPriority: FixedValue=1
          Constant QStoragePriority: FixedValue=1
        BiomassDemandAndPriority NDemands
          MultiplyFunction Structural
            VariableReference MinNconc: VariableName=[Stover].minimumNconc
            VariableReference PotentialDMAllocation: VariableName=[Stover].potentialDMAllocation.Structural
          MultiplyFunction Metabolic
            SubtractFunction MetabolicNconc
              VariableReference CritNconc: VariableName=[Stover].criticalNConc
              VariableReference MinNconc: VariableName=[Stover].minimumNconc
            VariableReference PotentialDMAllocation: VariableName=[Stover].potentialDMAllocation.Structural
          StorageNDemandFunction Storage
            VariableReference NitrogenDemandSwitch: VariableName=[Stover].nitrogenDemandSwitch
            VariableReference MaxNconc: VariableName=[Stover].maximumNconc
          Constant QStructuralPriority: FixedValue=1
          Constant QMetabolicPriority: FixedValue=1
          Constant QStoragePriority: FixedValue=1
        Constant NitrogenDemandSwitch: FixedValue=1
      Nodule
        Memo Description
          The nodule organ is unparameterised and simply has a switch that is turned on for legume crops (so they can fix what ever N the crop demands) and switched off for non legume crops (which fix no N)
        Constant MaximumNConc: FixedValue=0
        Constant RemobilisationCost: FixedValue=0
        Constant MinimumNConc: FixedValue=0
        Constant NReallocationFactor: FixedValue=0
        Constant SenescenceRate: FixedValue=0
        Constant FixationRate: FixedValue=1000
        BiomassRemoval BiomassRemovalDefaults
          OrganBiomassRemovalType Harvest: FractionLiveToRemove=0; FractionDeadToRemove=0; FractionLiveToResidue=0; FractionDeadToResidue=0
          OrganBiomassRemovalType Cut: FractionLiveToRemove=0; FractionDeadToRemove=0; FractionLiveToResidue=0; FractionDeadToResidue=0
          OrganBiomassRemovalType Prune: FractionLiveToRemove=0; FractionDeadToRemove=0; FractionLiveToResidue=0; FractionDeadToResidue=0
          OrganBiomassRemovalType Graze: FractionLiveToRemove=0; FractionDeadToRemove=0; FractionLiveToResidue=0; FractionDeadToResidue=0
        Constant InitialWtFunction: FixedValue=0; Units=g/m^2
        Constant DetachmentRateFunction: FixedValue=0; Units=/d
        Constant FixationMetabolicCost: FixedValue=0
        Constant MaintenanceRespirationFunction: FixedValue=0; Units=0-1
        Constant DMConversionEfficiency: FixedValue=1; Units=0-1
        Constant NRetranslocationFactor: FixedValue=0
        Constant NitrogenDemandSwitch: FixedValue=1
        Constant DMReallocationFactor: FixedValue=0
        Constant DMRetranslocationFactor: FixedValue=0
        VariableReference CriticalNConc: VariableName=[Nodule].MinimumNConc
        Constant CarbonConcentration: FixedValue=0.4
        BiomassDemand DMDemands
          MultiplyFunction Structural
            Constant DMDemandFunction: FixedValue=0; Units=g/m^2
            Constant StructuralFraction: FixedValue=1; Units=0-1
          Constant Metabolic: FixedValue=0
          StorageDMDemandFunction Storage
            SubtractFunction StorageFraction
              Constant One: FixedValue=1
              VariableReference StructuralFraction: VariableName=[Nodule].DMDemands.Structural.StructuralFraction
        BiomassDemand NDemands
          MultiplyFunction Structural
            VariableReference MinNconc: VariableName=[Nodule].minimumNconc
            VariableReference PotentialDMAllocation: VariableName=[Nodule].potentialDMAllocation.Structural
          MultiplyFunction Metabolic
            SubtractFunction MetabolicNconc
              VariableReference CritNconc: VariableName=[Nodule].criticalNConc
              VariableReference MinNconc: VariableName=[Nodule].minimumNconc
            VariableReference PotentialDMAllocation: VariableName=[Nodule].potentialDMAllocation.Structural
          StorageNDemandFunction Storage
            VariableReference NitrogenDemandSwitch: VariableName=[Nodule].nitrogenDemandSwitch
            VariableReference MaxNconc: VariableName=[Nodule].maximumNconc
      Root: GrowthRespiration=0; MaintenanceRespiration=0
        RootShapeCylinder RootShape
        Memo Description
          The root organ demands and is partitioned N and DM and its depth increases through time to provide a water uptake supply
        Constant DMConversionEfficiency: FixedValue=1; Units=0-1
        Constant RemobilisationCost: FixedValue=0
        LinearInterpolationFunction KLModifier
          XYPairs
            X=[0, 50, 100, 150, 200, 250, 300, 350, 400, 450, 500, 550, 600, 650, 700, 750, 800, 850, 900, 950, 1000, 1050, 1100, 1150, 1200, 1250, 1300, 1350, 1400, 1450]
            Y=[1, 1, 1, 0.74, 0.74, 0.74, 0.55, 0.55, 0.55, 0.4, 0.4, 0.4, 0.3, 0.3, 0.3, 0.23, 0.23, 0.23, 0.17, 0.17, 0.17, 0.13, 0.13, 0.13, 0.09, 0.09, 0.09, 0.07, 0.07, 0.07]
          Memo Description
            This is important in SPRUM as it is set for each species to represent their differences in rooting patterns between crop species.  The values for  each crop type are calculated externally from APSIM using the root depth of the crop and an exponential of the form:

            ~~~
            for (int layer = 0; layer lessthan  Soil.Physical.Thickness.Length; layer++)
            {
            if (layer.depth lessthan 305)
             layer.KLModifier = 1;
            else if (layer.depth lessthan Crop.RootDepth)
             layer.KLModifier = 1*exp(-.002*(1500/(Crop.RootDepth-300)*(layer.depth-300)));
            else:
             layer.KLModifier = 0;
            }
            ~~~

            This gives KLModifiers that decline exponentially from 1 in the top 300mm of soil to 0 at the crops maximum rooting depth.

            It is important to note that these modifiers are applied to the kl value specified in the SPRUMSoil node under the soil in your field so the values on the soil node should be set to 0.1 throughout the depth of the profile to produce sensible kl values.
          VariableReference XValue: VariableName=[Root].LayerMidPointDepth
        Constant SoilWaterEffect: FixedValue=1
        Constant MaxDailyNUptake: FixedValue=12
        Constant SenescenceRate: FixedValue=0
        Constant MaximumNConc: FixedValue=0.009
        Constant MinimumNConc: FixedValue=0.009
        Constant NitrogenDemandSwitch: FixedValue=1
        Constant MaximumRootDepth: FixedValue=1500
        Constant RootProportion: FixedValue=0.1
          Memo Description
            This is the proportion of total biomass that is paritioned into the roots and is used to set the partitioning fraction for the roots
        BiomassRemoval BiomassRemovalDefaults
          OrganBiomassRemovalType Harvest: FractionLiveToRemove=0; FractionDeadToRemove=0; FractionLiveToResidue=0.2; FractionDeadToResidue=0
          OrganBiomassRemovalType Cut: FractionLiveToRemove=0; FractionDeadToRemove=0; FractionLiveToResidue=0.2; FractionDeadToResidue=0
          OrganBiomassRemovalType Prune: FractionLiveToRemove=0; FractionDeadToRemove=0; FractionLiveToResidue=0.2; FractionDeadToResidue=0
          OrganBiomassRemovalType Graze: FractionLiveToRemove=0; FractionDeadToRemove=0; FractionLiveToResidue=0.2; FractionDeadToResidue=0
        Constant SpecificRootLength: FixedValue=40; Units=m/g
        LinearInterpolationFunction KNO3
          XYPairs: X=[0, 0.003]; Y=[0.02, 0.02]
          VariableReference XValue: VariableName=[Root].LengthDensity
        LinearInterpolationFunction KNH4
          XYPairs: X=[0, 0.003]; Y=[0, 0]
          VariableReference XValue: VariableName=[Root].LengthDensity
        LinearInterpolationFunction NUptakeSWFactor
          XYPairs: X=[0, 1]; Y=[0, 1]
          VariableReference XValue: VariableName=[Root].RWC
        Constant MaintenanceRespirationFunction: FixedValue=0
        Constant CarbonConcentration: FixedValue=0.4
        BiomassDemandAndPriority DMDemands
          MultiplyFunction Structural
            PartitionFractionDemandFunction DMDemandFunction
              Constant PartitionFraction: FixedValue=0.1
            Constant StructuralFraction: FixedValue=1
          Constant Metabolic: FixedValue=0
          StorageDMDemandFunction Storage
            SubtractFunction StorageFraction
              Constant One: FixedValue=1
              VariableReference StructuralFraction: VariableName=[Root].DMDemands.Structural.StructuralFraction
          Constant QStructuralPriority: FixedValue=1
          Constant QMetabolicPriority: FixedValue=1
          Constant QStoragePriority: FixedValue=1
        BiomassDemandAndPriority NDemands
          MultiplyFunction Structural
            VariableReference MinNconc: VariableName=[Root].minimumNconc
            VariableReference PotentialDMAllocation: VariableName=[Root].potentialDMAllocation.Structural
          MultiplyFunction Metabolic
            SubtractFunction MetabolicNconc
              VariableReference CritNconc: VariableName=[Root].criticalNConc
              VariableReference MinNconc: VariableName=[Root].minimumNconc
            VariableReference PotentialDMAllocation: VariableName=[Root].potentialDMAllocation.Structural
          StorageNDemandFunction Storage
            VariableReference NitrogenDemandSwitch: VariableName=[Root].nitrogenDemandSwitch
            VariableReference MaxNconc: VariableName=[Root].maximumNconc
          Constant QStructuralPriority: FixedValue=1
          Constant QMetabolicPriority: FixedValue=1
          Constant QStoragePriority: FixedValue=1
        VariableReference CriticalNConc: VariableName=[Root].MinimumNConc
        BiomassDemand InitialWt
          Constant Structural: FixedValue=0.2; Units=g/plant
          Constant Metabolic: FixedValue=0
          Constant Storage: FixedValue=0
        Constant RootDepthStressFactor: FixedValue=1
        Constant RootFrontVelocity: FixedValue=0
      CompositeBiomass Total: OrganNames=[Stover, Product, Root]; IncludeLive=true; IncludeDead=true
      CompositeBiomass AboveGround: OrganNames=[Stover, Product]; IncludeLive=true; IncludeDead=true
        Memo
          The AboveGround composite biomass object includes Stover and Product organs.
      Cultivar Pasture
      Constant MortalityRate: FixedValue=0
    Plant SCRUM: PlantType=SCRUM; IsAlive=false; IsEnding=false; DaysAfterEnding=0
      Memo TitlePage
        # SCRUM: the Simple Crop Resource Uptake Model

        _Hamish Brown and Rob Zyskowski, Plant and Food Research, New Zealand_

        This model has been built using the Plant Modelling Framework (PMF) of [brown_plant_2014] to simulate a range of different crops in simulations where water and nitrogen balance are of interest but a fully mechanistic plant model is not needed or is not available. It is a daily time step implementation of the crop model that is used on the Overseer nutrient balance model [Cichota_etal_2010].  It uses simple sigmoidal functions for estimating daily cover and biomass deltas to give realistic water and nitrogen demands. It does not simulate potential yield, this is specified as an input. Yield will be reduced below the specified potential yield if N or water supplies from the soil are insufficient to meet demand. The model has been paramaterised for simulating water and nitrogen balances of cropping rotations in New Zealand (where over 50 different crop types are grown and it is not feasible to produce full crop models for each of these).  Because of this the model is not as generically applicable as full APSIM crop models.   It may be adapted for other purposes and other crop types may be added but the user will need to keep in mind that because it is a simple model the the parameters might need changing for crops in different locations or for crops sown at different times of the year.  Some sensibility testing or validation is recommended before application in different sutuations.

        SCRUM has a simple phenology model which divides the crop growth into three main phases; a vegetative phase when the canopy is expanding, a reproductive phase when product is being formed and a senescing phase when the canopy is contracting.  SCRUM has 4 organ classes to represent different biomass components and the real biomass components that these classes represent changes from crop to crop:
           1. A Simple leaf class called <b>Stover</b> which represents the unharvested parts of the plant.  Generally, this represents the leaf and stem components of the crop but for crops where stem and leaf are part of the harvested product (e.g forages and leafy vegetables) than stover is the residual fraction of leaf and stem that is not harvested.
           2. A Generic organ class called <b>Product</b> which represents the plant parts that are harvested and removed from the field.  This could represent grain, fruits, tubers, leaf or stem depending on what sort of crop is being represented.
           3. A Root organ which extracts water and nitrogen from the soil for plant growth and returns biomass to the soil on harvest
           4. A Nodule organ which is only activated and fixes nitrogen for the legume crops.
        An Arbitrator is also included which determines the allocation of drymatter and nitrogen biomass between each of these organs.

        #Inclusion in APSIM simulations
        A scrum crop is included in a simulation the same as any other APSIM crop
         * The SCRUM object needs to be dragged or copied from the Crop folder in the tool box into the field of your simulation.
         * It is then planted with a sowing rule
        ~~~
        SCRUM.Sow(cultivar: Wheat_Autumn, population: 1, depth: 10, rowSpacing: 150);
        ~~~
          * Note that SCRUM has no notion of population or rowSpacing but these parameters are required by the Sow method so filler values are provided
          * To specify an expected Expected Yield that differs to the defalt value provided, included the following code in a manager script to be executed on the day of sowing.
        ~~~
         zone.Set("[SCRUM].Product.ExpectedYield.Value()", ResetValue);
        ~~~
        * SCRUM can be Harvested, Cut, Grazed and Pruned like other crops.  Defalt proportions of the biomass in each organ are removed from the sysem and/or added to the fields residue pools.  Note that defalt removal fraction for product on harvest is 0 (becaue it is represented with a generic organ) so more appropriate removal fractions should be sepcified in a manager script as follows:
        ~~~
        [EventSubscribe("Commencing")]
        private void OnSimulationCommencing(object sender, EventArgs e)
        {
          Remove = new RemovalFractions(SCRUM.Organs);
        }
        [EventSubscribe("DoManagement")]
        private void OnDoManagement(object sender, EventArgs e)
        {
          if (Clock.Today.Date == HarvestDate2)
          {
            Remove.SetFractionLiveToRemove("Product", 1.0);
            Remove.SetFractionLiveToRemove("Stover", 0.05);
            Remove.SetFractionLiveToResidue("Stover",0.95)
            SCRUM.Harvest(Remove);
            SCRUM.EndCrop();
          }
        }
        ~~~
        * A Remove class as shown above can be sent with Harvest, Cut, Graze and Prune events to specificy the proportions of removals.
         * Once a crop has been ended the field is open to plant another crop using another APSIM crop model or sowing another SCRUM crop.
      Phenology
        HourlyInterpolation ThermalTime: agregationMethod=0
          Memo Description
            Progression through each of the phenological stages is driven by thermal time.  As temperature increases from zero to 30 degrees, development acelerates and then slows down again above 30 degress
          XYPairs Response: X=[0, 30, 40]; Y=[0, 30, 0]
          ThreeHourSin InterpolationMethod
        Memo Description1
          As ThermalTime accumulates the crop progresses through the following phases:
        GerminatingPhase Germinating: Start=Sowing; End=Germination
        EmergingPhase Emerging: ShootLag=0; ShootRate=0; Start=Germination; End=Emergence; TTForTimeStep=0
          VariableReference ThermalTime: VariableName=[Phenology].ThermalTime
          Memo Description
            Currently the duration of the Emergence phase is set to zero because the period of zero cover and biomass production following sowing is accounted for in the cover and biomass accumulation functions.  However this phase is included if parameterisations of other crops in the future wish to give this phase a duration.
        GenericPhase CanopyExpanding: Start=Emergence; End=StartReproductive
          Memo Description
            During this phase the plant only partitions biomass to Root and Stover (leaf and stem) Organs
          Constant Target: FixedValue=1000; Units=<sup>o</sup>Cd
          VariableReference Progression: VariableName=[Phenology].ThermalTime
        GenericPhase YieldIncreasing: Start=StartReproductive; End=StartSenescence
          Memo Description
            During this phase the plant is partitioning biomass to Root, Stover and Product organs.
          Constant Target: FixedValue=600; Units=<sup>o</sup>Cd
          VariableReference Progression: VariableName=[Phenology].ThermalTime
        GenericPhase Senescing: Start=StartSenescence; End=EndReproductive
          Memo Description
            During this phase the plant is partitioning biomass to Root and Product organs and the canopy cover decreases from its maximum to zero
          Constant Target: FixedValue=600; Units=<sup>o</sup>Cd
          VariableReference Progression: VariableName=[Phenology].ThermalTime
        GenericPhase Mature: Start=EndReproductive; End=Maturity
          Constant Target: FixedValue=600; Units=<sup>o</sup>Cd
          VariableReference Progression: VariableName=[Phenology].ThermalTime
          Memo Description
            During this phase the plant has completed its growth and is drying ready for harvest.
        EndPhase ReadyForHarvesting: Start=Maturity; End=Unused
          VariableReference ThermalTime: VariableName=[Phenology].ThermalTime
      OrganArbitrator Arbitrator: same as Replacements.SPRUM.Arbitrator
      GenericOrgan Product: IsAboveGround=true
        Memo Description
          It is the biomass that is removed from the crop at harvest and may include grain, root, leaf, stem, pod or any other organ type depending on the type of crop and how it is harvested.
        Constant MaximumNConc: FixedValue=0.012
        Constant MinimumNConc: FixedValue=0.008
        Constant NReallocationFactor: FixedValue=0
        Constant RemobilisationCost: FixedValue=0
        Constant ExpectedYield: FixedValue=800
          Memo Description
            This is the Product yield (g/m2 fresh weight) that SCRUM will predict provided nitrogen and water supply are non-limiting
        Constant DryMatterContent: FixedValue=0.87
          Memo Description
            This is the dry matter content of the harvested yield and is used to convert fresh yield into *DryYield* which are subsequently used in determining *Ymax* (total biomass production), daily dry matter production, *HarvestIndex* and the *PartitioningFraction* of each organ
        MultiplyFunction DryYield
          Memo Description
            This variable is the product yield of the crop in g/m2 dry weight
          VariableReference FreshYld: VariableName=[Product].ExpectedYield
          VariableReference DMPercent: VariableName=[Product].DryMatterContent
        SubtractFunction WaterContent
          Memo Description
            This is used to convert the total Dry Matter of this organ back to fresh mass once daily partitining is complete.
          Constant One: FixedValue=1
          VariableReference DMcontent: VariableName=[Product].DryMatterContent
        Constant HarvestIndex: FixedValue=0.46
          Memo Description
            This is the Product yield (g/m2 fresh weight) that SCRUM will predict provided nitrogen and water supply are non-limiting
        Constant SenescenceRate: FixedValue=0; Units=/d
        BiomassRemoval BiomassRemovalDefaults
          OrganBiomassRemovalType Harvest: FractionLiveToRemove=0.5; FractionDeadToRemove=0; FractionLiveToResidue=0.1; FractionDeadToResidue=0
          OrganBiomassRemovalType Cut: FractionLiveToRemove=0.8; FractionDeadToRemove=0; FractionLiveToResidue=0; FractionDeadToResidue=0
          OrganBiomassRemovalType Prune: FractionLiveToRemove=0; FractionDeadToRemove=0; FractionLiveToResidue=0.6; FractionDeadToResidue=0
          OrganBiomassRemovalType Graze: FractionLiveToRemove=0.6; FractionDeadToRemove=0; FractionLiveToResidue=0.2; FractionDeadToResidue=0
        Constant DetachmentRateFunction: FixedValue=0; Units=/d
        Constant MaintenanceRespirationFunction: FixedValue=0; Units=0-1
        Constant DMConversionEfficiency: FixedValue=1; Units=0-1
        Constant NRetranslocationFactor: FixedValue=0
        Constant NitrogenDemandSwitch: FixedValue=1
        Constant DMReallocationFactor: FixedValue=0
        Constant DMRetranslocationFactor: FixedValue=0
        VariableReference CriticalNConc: VariableName=[Product].MinimumNConc
        Constant CarbonConcentration: FixedValue=0.4
        BiomassDemandAndPriority DMDemands
          MultiplyFunction Structural
            PartitionFractionDemandFunction DMDemandFunction
              PhaseLookup PartitionFraction
                PhaseLookupValue YieldIncreasing: Start=StartReproductive; End=StartSenescence
                  SubtractFunction ProductProportion
                    Constant One: FixedValue=1
                    VariableReference RootFraction: VariableName=[Root].RootProportion
                    VariableReference StoverFraction
                      VariableName=[Stover].DMDemands.Structural.DMDemandFunction.PartitionFraction.YieldIncreasing
                PhaseLookupValue Senescing: Start=StartSenescence; End=EndReproductive
                  SubtractFunction StoverFraction
                    Constant One: FixedValue=1
                    VariableReference RootFraction: VariableName=[Root].RootProportion
            Constant StructuralFraction: FixedValue=1; Units=0-1
          Constant Metabolic: FixedValue=0
          StorageDMDemandFunction Storage
            SubtractFunction StorageFraction
              Constant One: FixedValue=1
              VariableReference StructuralFraction: VariableName=[Product].DMDemands.Structural.StructuralFraction
          Constant QStructuralPriority: FixedValue=1
          Constant QMetabolicPriority: FixedValue=1
          Constant QStoragePriority: FixedValue=1
        BiomassDemandAndPriority NDemands: same as Replacements.SPRUM.Product.NDemands
        RetranslocateNonStructural RetranslocateNitrogen
        BiomassDemand InitialWt
          Constant Structural: FixedValue=0; Units=g/m^2
          Constant Metabolic: FixedValue=0
          Constant Storage: FixedValue=0
        Constant Photosynthesis: FixedValue=0
        VariableReference initialNConcFunction: VariableName=[Product].MinimumNConc
      SimpleLeaf Stover: Albedo=0.18; Gsmax350=0.01; R50=150; LeafInitialisationStage=Emergence; Height=0; BaseHeight=0; Width=0; FRGR=0; PotentialEP=0; WaterDemand=0; KDead=0; LAIDead=0
        Memo Description
          Stover represents any part of the crop that is not removed at harvest (i.e not part of the product).
        Constant StomatalConductanceCO2Modifier: FixedValue=1
        Constant NReallocationFactor: FixedValue=0
        Constant RemobilisationCost: FixedValue=0
        Constant SenescenceRate: FixedValue=0
        Constant DetachmentRate: FixedValue=0; Units=/d
        MultiplyFunction InitialWt
          Constant InitialPlantWt: FixedValue=0; Units=g/plant
          VariableReference Population: VariableName=[Plant].Population
        Constant LaiDead: FixedValue=0; Units=m^2/m^2
        MultiplyFunction Photosynthesis
          DeltaFunction UnStressedBiomass: StartStageName=Emergence
            SigmoidFunction Integral
              VariableReference Ymax: VariableName=[Stover].Ymax
              VariableReference XValue: VariableName=[Phenology].AccumulatedEmergedTT
              VariableReference Xo: VariableName=[Stover].XoBiomass
              VariableReference b: VariableName=[Stover].bBiomass
          LinearInterpolationFunction WaterStressFactor
            XYPairs: X=[0, 0, 0.5, 1]; Y=[0, 0, 1, 1]
            VariableReference XValue: VariableName=[Stover].Fw
        MinimumFunction FRGR: same as Replacements.SPRUM.Stover.FRGR
        PhaseLookup Cover
          PhaseLookupValue Expanding: Start=Emergence; End=StartSenescence
            SigmoidFunction SigCoverFunction
              Constant Ymax: FixedValue=0.97
              VariableReference XValue: VariableName=[Phenology].AccumulatedEmergedTT
              Constant Xo: FixedValue=540
              Constant b: FixedValue=120
          PhaseLookupValue Senescence: Start=StartSenescence; End=Maturity
            MultiplyFunction DecreasingCover
              HoldFunction MaxCover: WhenToHold=StartSenescence
                VariableReference ValueToHold: VariableName=[Stover].CoverGreen
              SubtractFunction ProportionLost
                Constant One: FixedValue=1
                DivideFunction ProportionRemaining
                  SubtractFunction TTSenesce
                    VariableReference AccumulatedThermalTime: VariableName=[Phenology].AccumulatedEmergedTT
                    AddFunction ThermalTimeAtStartSenescence
                      VariableReference CanopyExpandingTT: VariableName=[Phenology].CanopyExpanding.Target
                      VariableReference YieldIncreasingTT: VariableName=[Phenology].YieldIncreasing.Target
                  VariableReference SenescentPhaseDuration: VariableName=[Phenology].Senescing.Target
        Constant ExtinctionCoefficient: FixedValue=0.5
          Memo Description
            The extinction coefficient is used to calculate a LAI value (needed by MicroClimate) from the canopy cover
        LinearInterpolationFunction Tallness
          XYPairs: X=[3, 5, 6]; Y=[100, 800, 1200]
          VariableReference XValue: VariableName=[Phenology].Stage
        Constant MaximumNConc: FixedValue=0.008
        Constant MinimumNConc: FixedValue=0
        PhaseLookupValue NitrogenDemandSwitch: Start=Emergence; End=StartSenescence
          Constant One: FixedValue=1
        Constant XoBiomass: FixedValue=800
          Memo Description
            Is a coefficient for the potential biomass accumulation function
        Constant bBiomass: FixedValue=800
          Memo Description
            Is another coefficient for the potential biomass accumulation function
        DivideFunction Ymax
          Memo Description
            This variable is the total biomass (g/m2dry weight) that the crop will produce at maturity in the absence of stress
          VariableReference DryYield: VariableName=[Product].DryYield
          SubtractFunction AboveGroundDMProportion
            Constant One: FixedValue=1
            VariableReference RootFraction: VariableName=[Root].RootProportion
          VariableReference HarvestIndex: VariableName=[Product].HarvestIndex
        SigmoidFunction TotalBiomassAtStartReproductive
          VariableReference XValue: VariableName=[Phenology].CanopyExpanding.Target
          VariableReference Ymax: VariableName=[Stover].Ymax
          VariableReference Xo: VariableName=[Stover].XoBiomass
          VariableReference b: VariableName=[Stover].bBiomass
        SigmoidFunction TotalBiomassAtStartSenescence
          AddFunction XValue
            VariableReference CanopyExpandingTT: VariableName=[Phenology].CanopyExpanding.Target
            VariableReference YieldIncreasingTT: VariableName=[Phenology].YieldIncreasing.Target
          VariableReference Ymax: VariableName=[Stover].Ymax
          VariableReference Xo: VariableName=[Stover].XoBiomass
          VariableReference b: VariableName=[Stover].bBiomass
        SigmoidFunction TotalBiomassAtMaturity
          AddFunction XValue
            VariableReference CanopyExpandingTT: VariableName=[Phenology].CanopyExpanding.Target
            VariableReference YieldIncreasingTT: VariableName=[Phenology].YieldIncreasing.Target
            VariableReference SenescingTT: VariableName=[Phenology].Senescing.Target
          VariableReference Ymax: VariableName=[Stover].Ymax
          VariableReference Xo: VariableName=[Stover].XoBiomass
          VariableReference b: VariableName=[Stover].bBiomass
        BiomassRemoval BiomassRemovalDefaults
          OrganBiomassRemovalType Harvest: FractionLiveToRemove=0; FractionDeadToRemove=0; FractionLiveToResidue=0.3; FractionDeadToResidue=0
          OrganBiomassRemovalType Cut: FractionLiveToRemove=0.8; FractionDeadToRemove=0; FractionLiveToResidue=0; FractionDeadToResidue=0
          OrganBiomassRemovalType Prune: FractionLiveToRemove=0; FractionDeadToRemove=0; FractionLiveToResidue=0.6; FractionDeadToResidue=0
          OrganBiomassRemovalType Graze: FractionLiveToRemove=0.6; FractionDeadToRemove=0; FractionLiveToResidue=0.1; FractionDeadToResidue=0
        Constant MaintenanceRespiration: FixedValue=0; Units=0-1
        Constant DMConversionEfficiency: FixedValue=1; Units=0-1
        Constant NRetranslocationFactor: FixedValue=0
        Constant DMReallocationFactor: FixedValue=0
        Constant DMRetranslocationFactor: FixedValue=0
        VariableReference CriticalNConc: VariableName=[Stover].MinimumNConc
        Constant CarbonConcentration: FixedValue=0.4
        BiomassDemandAndPriority DMDemands
          MultiplyFunction Structural
            PartitionFractionDemandFunction DMDemandFunction
              Memo Description: same as Replacements.SPRUM.Stover.DMDemands.Structural.DMDemandFunction.Description
              PhaseLookup PartitionFraction
                PhaseLookupValue Expanding: Start=Emergence; End=StartReproductive
                  SubtractFunction DMPartitionCoefficient
                    Constant One: FixedValue=1
                    VariableReference RootFraction: VariableName=[Root].RootProportion
                PhaseLookupValue YieldIncreasing: Start=StartReproductive; End=StartSenescence
                  DivideFunction DMPartitionCoefficient
                    SubtractFunction StoverBiomass
                      MultiplyFunction StoverAtMaturity
                        SubtractFunction AboveGroundProportion
                          Constant One: FixedValue=1
                          VariableReference RootFraction: VariableName=[Root].RootProportion
                        SubtractFunction StoverProportion
                          Constant One: FixedValue=1
                          VariableReference HI: VariableName=[Product].HarvestIndex
                        VariableReference BiomassAtMaturity: VariableName=[Stover].TotalBiomassAtMaturity
                      MultiplyFunction StoverAtStartReproductive
                        VariableReference BiomassAtStartReproductive: VariableName=[Stover].TotalBiomassAtStartReproductive
                        SubtractFunction AboveGroundProportion
                          Constant One: FixedValue=1
                          VariableReference RootFraction: VariableName=[Root].RootProportion
                    SubtractFunction TotalBiomass
                      VariableReference BiomassAtStartSenescence: VariableName=[Stover].TotalBiomassAtStartSenescence
                      VariableReference BiomassAtStartReproductive: VariableName=[Stover].TotalBiomassAtStartReproductive
            Constant StructuralFraction: FixedValue=1; Units=0-1
          Constant Metabolic: FixedValue=0
          StorageDMDemandFunction Storage
            SubtractFunction StorageFraction
              Constant One: FixedValue=1
              VariableReference StructuralFraction: VariableName=[Stover].DMDemands.Structural.StructuralFraction
          Constant QStructuralPriority: FixedValue=1
          Constant QMetabolicPriority: FixedValue=1
          Constant QStoragePriority: FixedValue=1
        BiomassDemandAndPriority NDemands: same as Replacements.SPRUM.Stover.NDemands
      Root: GrowthRespiration=0; MaintenanceRespiration=0
        RootShapeCylinder RootShape
        Memo Description
          The root organ demands and is partitioned N and DM and its depth increases through time to provide a water uptake supply
        Constant DMConversionEfficiency: FixedValue=1; Units=0-1
        Constant RemobilisationCost: FixedValue=0
        LinearInterpolationFunction KLModifier
          XYPairs
            X=[0, 50, 100, 150, 200, 250, 300, 350, 400, 450, 500, 550, 600, 650, 700, 750, 800, 850, 900, 950, 1000, 1050, 1100, 1150, 1200, 1250, 1300, 1350, 1400, 1450]
            Y=[1, 1, 1, 1, 1, 1, 1, 1, 1, 1, 1, 1, 1, 1, 1, 1, 1, 1, 1, 1, 1, 1, 1, 1, 1, 1, 1, 1, 1, 1]
          Memo Description
            This is important in SCRUM as it is set for each species to represent their differences in rooting patterns between crop species.  The values for  each crop type are calculated externally from APSIM using the root depth of the crop and an exponential of the form:

            ~~~
            for (int layer = 0; layer lessthan  Soil.Physical.Thickness.Length; layer++)
            {
            if (layer.depth lessthan 305)
             layer.KLModifier = 1;
            else if (layer.depth lessthan Crop.RootDepth)
             layer.KLModifier = 1*exp(-.002*(1500/(Crop.RootDepth-300)*(layer.depth-300)));
            else:
             layer.KLModifier = 0;
            }
            ~~~

            This gives KLModifiers that decline exponentially from 1 in the top 300mm of soil to 0 at the crops maximum rooting depth.

            It is important to note that these modifiers are applied to the kl value specified in the SCRUMSoil node under the soil in your field so the values on the soil node should be set to 0.1 throughout the depth of the profile to produce sensible kl values.
          VariableReference XValue: VariableName=[Root].LayerMidPointDepth
        Constant SoilWaterEffect: FixedValue=1
        Constant MaxDailyNUptake: FixedValue=12
        Constant SenescenceRate: FixedValue=0
        Constant MaximumNConc: FixedValue=0.009
        Constant MinimumNConc: FixedValue=0.009
        PhaseLookupValue NitrogenDemandSwitch: Start=Germination; End=Maturity
          Constant: FixedValue=1
        Constant MaximumRootDepth: FixedValue=1500
        MultiplyFunction RootFrontVelocity
          LessThanFunction RootFrontVelocity
            VariableReference TestVariable: VariableName=[Phenology].AccumulatedEmergedTT
            AddFunction GrowthDuration
              VariableReference CanopyExpandingTT: VariableName=[Phenology].CanopyExpanding.Target
              VariableReference YieldIncreasingTT: VariableName=[Phenology].YieldIncreasing.Target
            DivideFunction IfTrue
              VariableReference MaxRootDepth: VariableName=[Root].MaximumRootDepth
              VariableReference GrowthDuration: VariableName=[Root].RootFrontVelocity.RootFrontVelocity.GrowthDuration
            Constant IfFalse: FixedValue=0
          VariableReference ThermalTime: VariableName=[Phenology].ThermalTime
        Constant RootProportion: FixedValue=0.1
          Memo Description
            This is the proportion of total biomass that is paritioned into the roots and is used to set the partitioning fraction for the roots
        BiomassRemoval BiomassRemovalDefaults
          OrganBiomassRemovalType Harvest: FractionLiveToRemove=0; FractionDeadToRemove=0; FractionLiveToResidue=0.2; FractionDeadToResidue=0
          OrganBiomassRemovalType Cut: FractionLiveToRemove=0; FractionDeadToRemove=0; FractionLiveToResidue=0.3; FractionDeadToResidue=0
          OrganBiomassRemovalType Prune: FractionLiveToRemove=0; FractionDeadToRemove=0; FractionLiveToResidue=0.1; FractionDeadToResidue=0
          OrganBiomassRemovalType Graze: FractionLiveToRemove=0; FractionDeadToRemove=0; FractionLiveToResidue=0.15; FractionDeadToResidue=0
        Constant SpecificRootLength: FixedValue=40; Units=m/g
        LinearInterpolationFunction KNO3
          XYPairs: X=[0, 0.003]; Y=[0.02, 0.02]
          VariableReference XValue: VariableName=[Root].LengthDensity
        LinearInterpolationFunction KNH4
          XYPairs: X=[0, 0.003]; Y=[0, 0]
          VariableReference XValue: VariableName=[Root].LengthDensity
        LinearInterpolationFunction NUptakeSWFactor
          XYPairs: X=[0, 1]; Y=[0, 1]
          VariableReference XValue: VariableName=[Root].RWC
        Constant MaintenanceRespirationFunction: FixedValue=0
        Constant CarbonConcentration: FixedValue=0.4
        BiomassDemandAndPriority DMDemands
          MultiplyFunction Structural
            PartitionFractionDemandFunction DMDemandFunction
              PhaseLookupValue PartitionFraction: Start=Emergence; End=EndReproductive
                VariableReference RootProportion: VariableName=[Root].RootProportion
            Constant StructuralFraction: FixedValue=1
          Constant Metabolic: FixedValue=0
          StorageDMDemandFunction Storage
            SubtractFunction StorageFraction
              Constant One: FixedValue=1
              VariableReference StructuralFraction: VariableName=[Root].DMDemands.Structural.StructuralFraction
          Constant QStructuralPriority: FixedValue=1
          Constant QMetabolicPriority: FixedValue=1
          Constant QStoragePriority: FixedValue=1
        BiomassDemandAndPriority NDemands: same as Replacements.SPRUM.Root.NDemands
        VariableReference CriticalNConc: VariableName=[Root].MinimumNConc
        BiomassDemand InitialWt
          Constant Structural: FixedValue=0.2; Units=g/plant
          Constant Metabolic: FixedValue=0
          Constant Storage: FixedValue=0
        Constant RootDepthStressFactor: FixedValue=1
      Nodule
        Memo Description
          The nodule organ is unparameterised and simply has a switch that is turned on for legume crops (so they can fix what ever N the crop demands) and switched off for non legume crops (which fix no N)
        Constant MaximumNConc: FixedValue=0
        Constant RemobilisationCost: FixedValue=0
        Constant MinimumNConc: FixedValue=0
        Constant NReallocationFactor: FixedValue=0
        Constant SenescenceRate: FixedValue=0
        Constant FixationRate: FixedValue=0
        BiomassRemoval BiomassRemovalDefaults: same as Replacements.SPRUM.Nodule.BiomassRemovalDefaults
        Constant InitialWtFunction: FixedValue=0; Units=g/m^2
        Constant DetachmentRateFunction: FixedValue=0; Units=/d
        Constant FixationMetabolicCost: FixedValue=0
        Constant MaintenanceRespirationFunction: FixedValue=0; Units=0-1
        Constant DMConversionEfficiency: FixedValue=1; Units=0-1
        Constant NRetranslocationFactor: FixedValue=0
        Constant NitrogenDemandSwitch: FixedValue=1
        Constant DMReallocationFactor: FixedValue=0
        Constant DMRetranslocationFactor: FixedValue=0
        VariableReference CriticalNConc: VariableName=[Nodule].MinimumNConc
        Constant CarbonConcentration: FixedValue=0.4
        BiomassDemand DMDemands: same as Replacements.SPRUM.Nodule.DMDemands
        BiomassDemand NDemands: same as Replacements.SPRUM.Nodule.NDemands
      CompositeBiomass Total: OrganNames=[Stover, Product, Root]; IncludeLive=true; IncludeDead=true
      CompositeBiomass AboveGround: OrganNames=[Stover, Product]; IncludeLive=true; IncludeDead=true
        Memo
          The AboveGround composite biomass object includes Stover and Product organs.
      Cultivar Barley_Autumn
        Command:
          [Nodule].FixationMetabolicCost.FixedValue = 0
          [Nodule].FixationRate.FixedValue = 0
          [Phenology].CanopyExpanding.Target.FixedValue = 1461.0
          [Phenology].Senescing.Target.FixedValue = 600
          [Phenology].YieldIncreasing.Target.FixedValue = 939.0
          [Product].DryMatterContent.FixedValue = 0.87
          [Product].ExpectedYield.FixedValue = 1200
          [Product].HarvestIndex.FixedValue = 0.51
          [Product].MaximumNConc.FixedValue = 0.02
          [Product].MinimumNConc.FixedValue = 0.01
          [Root].KLModifier.XYPairs.Y = 1,1,1,1,1,1,1,0.882,0.779,0.687,0.607,0.535,0.472,0.417,0.368,0.325,0.287,0.253,0.223,0.197,0.174,0.153,0.135,0.119,0.105,0.093,0.082,0.072,0.064,0.056
          [Root].MaximumNConc.FixedValue = 0.009
          [Root].MaximumRootDepth.FixedValue = 1500
          [Root].MinimumNConc.FixedValue = 0.009
          [Root].RootProportion.FixedValue = 0.1
          [Stover].Cover.Expanding.SigCoverFunction.Xo.FixedValue = 540
          [Stover].Cover.Expanding.SigCoverFunction.Ymax.FixedValue = 0.96
          [Stover].Cover.Expanding.SigCoverFunction.b.FixedValue = 120
          [Stover].MaximumNConc.FixedValue = 0.006
          [Stover].MinimumNConc.FixedValue = 0.006
          [Stover].XoBiomass.FixedValue = 1500.0
          [Stover].bBiomass.FixedValue = 300.0
      Cultivar Barley_Spring
        Command:
          [Nodule].FixationMetabolicCost.FixedValue = 0
          [Nodule].FixationRate.FixedValue = 0
          [Phenology].CanopyExpanding.Target.FixedValue = 848.0
          [Phenology].Senescing.Target.FixedValue = 300
          [Phenology].YieldIncreasing.Target.FixedValue = 652.0
          [Product].DryMatterContent.FixedValue = 0.87
          [Product].ExpectedYield.FixedValue = 800
          [Product].HarvestIndex.FixedValue = 0.46
          [Product].MaximumNConc.FixedValue = 0.02
          [Product].MinimumNConc.FixedValue = 0.01
          [Root].KLModifier.XYPairs.Y = 1,1,1,1,1,1,1,0.807,0.651,0.526,0.424,0.343,0.276,0.223,0.18,0.145,0.117,0.095,0.076,0.062,0,0,0,0,0,0,0,0,0,0
          [Root].MaximumNConc.FixedValue = 0.009
          [Root].MaximumRootDepth.FixedValue = 1000
          [Root].MinimumNConc.FixedValue = 0.009
          [Root].RootProportion.FixedValue = 0.1
          [Stover].Cover.Expanding.SigCoverFunction.Xo.FixedValue = 540
          [Stover].Cover.Expanding.SigCoverFunction.Ymax.FixedValue = 0.96
          [Stover].Cover.Expanding.SigCoverFunction.b.FixedValue = 120
          [Stover].MaximumNConc.FixedValue = 0.006
          [Stover].MinimumNConc.FixedValue = 0.006
          [Stover].XoBiomass.FixedValue = 900.0
          [Stover].bBiomass.FixedValue = 180.0
      Cultivar Barley_SpringForage
        Command:
          [Nodule].FixationMetabolicCost.FixedValue = 0
          [Nodule].FixationRate.FixedValue = 0
          [Phenology].CanopyExpanding.Target.FixedValue = 326.0
          [Phenology].Senescing.Target.FixedValue = 300
          [Phenology].YieldIncreasing.Target.FixedValue = 1174.0
          [Product].DryMatterContent.FixedValue = 0.4
          [Product].ExpectedYield.FixedValue = 2000
          [Product].HarvestIndex.FixedValue = 0.95
          [Product].MaximumNConc.FixedValue = 0.013
          [Product].MinimumNConc.FixedValue = 0.0091
          [Root].KLModifier.XYPairs.Y = 1,1,1,1,1,1,1,0.882,0.779,0.687,0.607,0.535,0.472,0.417,0.368,0.325,0.287,0.253,0.223,0.197,0.174,0.153,0.135,0.119,0.105,0.093,0.082,0.072,0.064,0.056
          [Root].MaximumNConc.FixedValue = 0.009
          [Root].MaximumRootDepth.FixedValue = 1500
          [Root].MinimumNConc.FixedValue = 0.009
          [Root].RootProportion.FixedValue = 0.1
          [Stover].Cover.Expanding.SigCoverFunction.Xo.FixedValue = 540
          [Stover].Cover.Expanding.SigCoverFunction.Ymax.FixedValue = 0.96
          [Stover].Cover.Expanding.SigCoverFunction.b.FixedValue = 120
          [Stover].MaximumNConc.FixedValue = 0.005
          [Stover].MinimumNConc.FixedValue = 0.005
          [Stover].XoBiomass.FixedValue = 900.0
          [Stover].bBiomass.FixedValue = 180.0
      Cultivar Beets
        Command:
          [Nodule].FixationMetabolicCost.FixedValue = 0
          [Nodule].FixationRate.FixedValue = 0
          [Phenology].CanopyExpanding.Target.FixedValue = 874.0
          [Phenology].Senescing.Target.FixedValue = 750
          [Phenology].YieldIncreasing.Target.FixedValue = 1076.0
          [Product].DryMatterContent.FixedValue = 0.14
          [Product].ExpectedYield.FixedValue = 5500
          [Product].HarvestIndex.FixedValue = 0.815
          [Product].MaximumNConc.FixedValue = 0.015
          [Product].MinimumNConc.FixedValue = 0.0105
          [Root].KLModifier.XYPairs.Y = 1,1,1,1,1,1,1,0.472,0.223,0.105,0,0,0,0,0,0,0,0,0,0,0,0,0,0,0,0,0,0,0,0
          [Root].MaximumNConc.FixedValue = 0.01
          [Root].MaximumRootDepth.FixedValue = 500
          [Root].MinimumNConc.FixedValue = 0.01
          [Root].RootProportion.FixedValue = 0.1
          [Stover].Cover.Expanding.SigCoverFunction.Xo.FixedValue = 690
          [Stover].Cover.Expanding.SigCoverFunction.Ymax.FixedValue = 0.95
          [Stover].Cover.Expanding.SigCoverFunction.b.FixedValue = 120
          [Stover].MaximumNConc.FixedValue = 0.02
          [Stover].MinimumNConc.FixedValue = 0.02
          [Stover].XoBiomass.FixedValue = 1350.0
          [Stover].bBiomass.FixedValue = 270.0
      Cultivar Beets_Seed
        Command:
          [Nodule].FixationMetabolicCost.FixedValue = 0
          [Nodule].FixationRate.FixedValue = 0
          [Phenology].CanopyExpanding.Target.FixedValue = 1534.0
          [Phenology].Senescing.Target.FixedValue = 300
          [Phenology].YieldIncreasing.Target.FixedValue = 1107.0
          [Product].DryMatterContent.FixedValue = 0.85
          [Product].ExpectedYield.FixedValue = 200
          [Product].HarvestIndex.FixedValue = 0.2
          [Product].MaximumNConc.FixedValue = 0.03
          [Product].MinimumNConc.FixedValue = 0.0105
          [Root].KLModifier.XYPairs.Y = 1,1,1,1,1,1,1,0.807,0.651,0.526,0.424,0.343,0.276,0.223,0.18,0.145,0.117,0.095,0.076,0.062,0,0,0,0,0,0,0,0,0,0
          [Root].MaximumNConc.FixedValue = 0.008
          [Root].MaximumRootDepth.FixedValue = 1000
          [Root].MinimumNConc.FixedValue = 0.01
          [Root].RootProportion.FixedValue = 0.1
          [Stover].Cover.Expanding.SigCoverFunction.Xo.FixedValue = 540
          [Stover].Cover.Expanding.SigCoverFunction.Ymax.FixedValue = 0.96
          [Stover].Cover.Expanding.SigCoverFunction.b.FixedValue = 120
          [Stover].MaximumNConc.FixedValue = 0.02
          [Stover].MinimumNConc.FixedValue = 0.02
          [Stover].XoBiomass.FixedValue = 1470.0
          [Stover].bBiomass.FixedValue = 294.0
      Cultivar Brassica
        Command:
          [Nodule].FixationMetabolicCost.FixedValue = 0
          [Nodule].FixationRate.FixedValue = 0
          [Phenology].CanopyExpanding.Target.FixedValue = 420.0
          [Phenology].Senescing.Target.FixedValue = 0
          [Phenology].YieldIncreasing.Target.FixedValue = 1230.0
          [Product].DryMatterContent.FixedValue = 1.0
          [Product].ExpectedYield.FixedValue = 800
          [Product].HarvestIndex.FixedValue = 0.9
          [Product].MaximumNConc.FixedValue = 0.03
          [Product].MinimumNConc.FixedValue = 0.021
          [Root].KLModifier.XYPairs.Y = 1,1,1,1,1,1,1,0.687,0.472,0.325,0.223,0.153,0.105,0.072,0,0,0,0,0,0,0,0,0,0,0,0,0,0,0,0
          [Root].MaximumNConc.FixedValue = 0.01
          [Root].MaximumRootDepth.FixedValue = 700
          [Root].MinimumNConc.FixedValue = 0.01
          [Root].RootProportion.FixedValue = 0.1
          [Stover].Cover.Expanding.SigCoverFunction.Xo.FixedValue = 690
          [Stover].Cover.Expanding.SigCoverFunction.Ymax.FixedValue = 0.96
          [Stover].Cover.Expanding.SigCoverFunction.b.FixedValue = 60
          [Stover].MaximumNConc.FixedValue = 0.03
          [Stover].MinimumNConc.FixedValue = 0.03
          [Stover].XoBiomass.FixedValue = 825.0
          [Stover].bBiomass.FixedValue = 165.0
      Cultivar Broccoli_Seed
        Command:
          [Nodule].FixationMetabolicCost.FixedValue = 0
          [Nodule].FixationRate.FixedValue = 0
          [Phenology].CanopyExpanding.Target.FixedValue = 1192.0
          [Phenology].Senescing.Target.FixedValue = 300
          [Phenology].YieldIncreasing.Target.FixedValue = 523.0
          [Product].DryMatterContent.FixedValue = 0.84
          [Product].ExpectedYield.FixedValue = 150
          [Product].HarvestIndex.FixedValue = 0.2
          [Product].MaximumNConc.FixedValue = 0.03
          [Product].MinimumNConc.FixedValue = 0.02
          [Root].KLModifier.XYPairs.Y = 1,1,1,1,1,1,1,0.807,0.651,0.526,0.424,0.343,0.276,0.223,0.18,0.145,0.117,0.095,0.076,0.062,0,0,0,0,0,0,0,0,0,0
          [Root].MaximumNConc.FixedValue = 0.008
          [Root].MaximumRootDepth.FixedValue = 1000
          [Root].MinimumNConc.FixedValue = 0.008
          [Root].RootProportion.FixedValue = 0.1
          [Stover].Cover.Expanding.SigCoverFunction.Xo.FixedValue = 540
          [Stover].Cover.Expanding.SigCoverFunction.Ymax.FixedValue = 0.96
          [Stover].Cover.Expanding.SigCoverFunction.b.FixedValue = 120
          [Stover].MaximumNConc.FixedValue = 0.02
          [Stover].MinimumNConc.FixedValue = 0.02
          [Stover].XoBiomass.FixedValue = 1008.0
          [Stover].bBiomass.FixedValue = 202.0
      Cultivar Broccoli_summer
        Command:
          [Nodule].FixationMetabolicCost.FixedValue = 0
          [Nodule].FixationRate.FixedValue = 0
          [Phenology].CanopyExpanding.Target.FixedValue = 1664.0
          [Phenology].Senescing.Target.FixedValue = 900
          [Phenology].YieldIncreasing.Target.FixedValue = 436.0
          [Product].DryMatterContent.FixedValue = 0.11
          [Product].ExpectedYield.FixedValue = 1200
          [Product].HarvestIndex.FixedValue = 0.2
          [Product].MaximumNConc.FixedValue = 0.035
          [Product].MinimumNConc.FixedValue = 0.0245
          [Root].KLModifier.XYPairs.Y = 1,1,1,1,1,1,1,0.472,0.223,0.105,0,0,0,0,0,0,0,0,0,0,0,0,0,0,0,0,0,0,0,0
          [Root].MaximumNConc.FixedValue = 0.009
          [Root].MaximumRootDepth.FixedValue = 500
          [Root].MinimumNConc.FixedValue = 0.009
          [Root].RootProportion.FixedValue = 0.1
          [Stover].Cover.Expanding.SigCoverFunction.Xo.FixedValue = 450
          [Stover].Cover.Expanding.SigCoverFunction.Ymax.FixedValue = 0.8
          [Stover].Cover.Expanding.SigCoverFunction.b.FixedValue = 120
          [Stover].MaximumNConc.FixedValue = 0.038
          [Stover].MinimumNConc.FixedValue = 0.038
          [Stover].XoBiomass.FixedValue = 1500.0
          [Stover].bBiomass.FixedValue = 300.0
      Cultivar Broccoli_winter_spring
        Command:
          [Nodule].FixationMetabolicCost.FixedValue = 0
          [Nodule].FixationRate.FixedValue = 0
          [Phenology].CanopyExpanding.Target.FixedValue = 1739.0
          [Phenology].Senescing.Target.FixedValue = 900
          [Phenology].YieldIncreasing.Target.FixedValue = 361.0
          [Product].DryMatterContent.FixedValue = 0.11
          [Product].ExpectedYield.FixedValue = 800
          [Product].HarvestIndex.FixedValue = 0.13
          [Product].MaximumNConc.FixedValue = 0.035
          [Product].MinimumNConc.FixedValue = 0.0245
          [Root].KLModifier.XYPairs.Y = 1,1,1,1,1,1,1,0.472,0.223,0.105,0,0,0,0,0,0,0,0,0,0,0,0,0,0,0,0,0,0,0,0
          [Root].MaximumNConc.FixedValue = 0.009
          [Root].MaximumRootDepth.FixedValue = 500
          [Root].MinimumNConc.FixedValue = 0.009
          [Root].RootProportion.FixedValue = 0.1
          [Stover].Cover.Expanding.SigCoverFunction.Xo.FixedValue = 450
          [Stover].Cover.Expanding.SigCoverFunction.Ymax.FixedValue = 0.8
          [Stover].Cover.Expanding.SigCoverFunction.b.FixedValue = 120
          [Stover].MaximumNConc.FixedValue = 0.038
          [Stover].MinimumNConc.FixedValue = 0.038
          [Stover].XoBiomass.FixedValue = 1500.0
          [Stover].bBiomass.FixedValue = 300.0
      Cultivar BrusselSprouts
        Command:
          [Nodule].FixationMetabolicCost.FixedValue = 0
          [Nodule].FixationRate.FixedValue = 0
          [Phenology].CanopyExpanding.Target.FixedValue = 1470.0
          [Phenology].Senescing.Target.FixedValue = 900
          [Phenology].YieldIncreasing.Target.FixedValue = 630.0
          [Product].DryMatterContent.FixedValue = 0.2
          [Product].ExpectedYield.FixedValue = 1500
          [Product].HarvestIndex.FixedValue = 0.4
          [Product].MaximumNConc.FixedValue = 0.035
          [Product].MinimumNConc.FixedValue = 0.0245
          [Root].KLModifier.XYPairs.Y = 1,1,1,1,1,1,1,0.472,0.223,0.105,0,0,0,0,0,0,0,0,0,0,0,0,0,0,0,0,0,0,0,0
          [Root].MaximumNConc.FixedValue = 0.009
          [Root].MaximumRootDepth.FixedValue = 500
          [Root].MinimumNConc.FixedValue = 0.009
          [Root].RootProportion.FixedValue = 0.1
          [Stover].Cover.Expanding.SigCoverFunction.Xo.FixedValue = 450
          [Stover].Cover.Expanding.SigCoverFunction.Ymax.FixedValue = 0.8
          [Stover].Cover.Expanding.SigCoverFunction.b.FixedValue = 120
          [Stover].MaximumNConc.FixedValue = 0.038
          [Stover].MinimumNConc.FixedValue = 0.038
          [Stover].XoBiomass.FixedValue = 1500.0
          [Stover].bBiomass.FixedValue = 300.0
      Cultivar Cabbage_summer
        Command:
          [Nodule].FixationMetabolicCost.FixedValue = 0
          [Nodule].FixationRate.FixedValue = 0
          [Phenology].CanopyExpanding.Target.FixedValue = 1080.0
          [Phenology].Senescing.Target.FixedValue = 900
          [Phenology].YieldIncreasing.Target.FixedValue = 1020.0
          [Product].DryMatterContent.FixedValue = 0.08
          [Product].ExpectedYield.FixedValue = 7000
          [Product].HarvestIndex.FixedValue = 0.75
          [Product].MaximumNConc.FixedValue = 0.026
          [Product].MinimumNConc.FixedValue = 0.0182
          [Root].KLModifier.XYPairs.Y = 1,1,1,1,1,1,1,0.472,0.223,0.105,0,0,0,0,0,0,0,0,0,0,0,0,0,0,0,0,0,0,0,0
          [Root].MaximumNConc.FixedValue = 0.009
          [Root].MaximumRootDepth.FixedValue = 500
          [Root].MinimumNConc.FixedValue = 0.009
          [Root].RootProportion.FixedValue = 0.1
          [Stover].Cover.Expanding.SigCoverFunction.Xo.FixedValue = 360
          [Stover].Cover.Expanding.SigCoverFunction.Ymax.FixedValue = 0.8
          [Stover].Cover.Expanding.SigCoverFunction.b.FixedValue = 120
          [Stover].MaximumNConc.FixedValue = 0.03
          [Stover].MinimumNConc.FixedValue = 0.03
          [Stover].XoBiomass.FixedValue = 1500.0
          [Stover].bBiomass.FixedValue = 300.0
      Cultivar Cabbage_winter_spring
        Command:
          [Nodule].FixationMetabolicCost.FixedValue = 0
          [Nodule].FixationRate.FixedValue = 0
          [Phenology].CanopyExpanding.Target.FixedValue = 1269.0
          [Phenology].Senescing.Target.FixedValue = 900
          [Phenology].YieldIncreasing.Target.FixedValue = 831.0
          [Product].DryMatterContent.FixedValue = 0.12
          [Product].ExpectedYield.FixedValue = 5000
          [Product].HarvestIndex.FixedValue = 0.6
          [Product].MaximumNConc.FixedValue = 0.026
          [Product].MinimumNConc.FixedValue = 0.0182
          [Root].KLModifier.XYPairs.Y = 1,1,1,1,1,1,1,0.472,0.223,0.105,0,0,0,0,0,0,0,0,0,0,0,0,0,0,0,0,0,0,0,0
          [Root].MaximumNConc.FixedValue = 0.009
          [Root].MaximumRootDepth.FixedValue = 500
          [Root].MinimumNConc.FixedValue = 0.009
          [Root].RootProportion.FixedValue = 0.1
          [Stover].Cover.Expanding.SigCoverFunction.Xo.FixedValue = 360
          [Stover].Cover.Expanding.SigCoverFunction.Ymax.FixedValue = 0.8
          [Stover].Cover.Expanding.SigCoverFunction.b.FixedValue = 120
          [Stover].MaximumNConc.FixedValue = 0.03
          [Stover].MinimumNConc.FixedValue = 0.03
          [Stover].XoBiomass.FixedValue = 1500.0
          [Stover].bBiomass.FixedValue = 300.0
      Cultivar Carrots
        Command:
          [Nodule].FixationMetabolicCost.FixedValue = 0
          [Nodule].FixationRate.FixedValue = 0
          [Phenology].CanopyExpanding.Target.FixedValue = 955.0
          [Phenology].Senescing.Target.FixedValue = 750
          [Phenology].YieldIncreasing.Target.FixedValue = 2045.0
          [Product].DryMatterContent.FixedValue = 0.12
          [Product].ExpectedYield.FixedValue = 7000
          [Product].HarvestIndex.FixedValue = 0.9
          [Product].MaximumNConc.FixedValue = 0.01
          [Product].MinimumNConc.FixedValue = 0.007
          [Root].KLModifier.XYPairs.Y = 1,1,1,1,1,1,1,0.472,0.223,0.105,0,0,0,0,0,0,0,0,0,0,0,0,0,0,0,0,0,0,0,0
          [Root].MaximumNConc.FixedValue = 0.01
          [Root].MaximumRootDepth.FixedValue = 500
          [Root].MinimumNConc.FixedValue = 0.01
          [Root].RootProportion.FixedValue = 0.1
          [Stover].Cover.Expanding.SigCoverFunction.Xo.FixedValue = 690
          [Stover].Cover.Expanding.SigCoverFunction.Ymax.FixedValue = 0.9
          [Stover].Cover.Expanding.SigCoverFunction.b.FixedValue = 120
          [Stover].MaximumNConc.FixedValue = 0.02
          [Stover].MinimumNConc.FixedValue = 0.02
          [Stover].XoBiomass.FixedValue = 1875.0
          [Stover].bBiomass.FixedValue = 375.0
      Cultivar Carrot_Seed
        Command:
          [Nodule].FixationMetabolicCost.FixedValue = 0
          [Nodule].FixationRate.FixedValue = 0
          [Phenology].CanopyExpanding.Target.FixedValue = 2423.0
          [Phenology].Senescing.Target.FixedValue = 300
          [Phenology].YieldIncreasing.Target.FixedValue = 1511.0
          [Product].DryMatterContent.FixedValue = 0.85
          [Product].ExpectedYield.FixedValue = 170
          [Product].HarvestIndex.FixedValue = 0.15
          [Product].MaximumNConc.FixedValue = 0.03
          [Product].MinimumNConc.FixedValue = 0.01
          [Root].KLModifier.XYPairs.Y = 1,1,1,1,1,1,1,0.472,0.223,0.105,0,0,0,0,0,0,0,0,0,0,0,0,0,0,0,0,0,0,0,0
          [Root].MaximumNConc.FixedValue = 0.008
          [Root].MaximumRootDepth.FixedValue = 1000
          [Root].MinimumNConc.FixedValue = 0.008
          [Root].RootProportion.FixedValue = 0.1
          [Stover].Cover.Expanding.SigCoverFunction.Xo.FixedValue = 690
          [Stover].Cover.Expanding.SigCoverFunction.Ymax.FixedValue = 0.95
          [Stover].Cover.Expanding.SigCoverFunction.b.FixedValue = 120
          [Stover].MaximumNConc.FixedValue = 0.02
          [Stover].MinimumNConc.FixedValue = 0.02
          [Stover].XoBiomass.FixedValue = 2117.0
          [Stover].bBiomass.FixedValue = 423.0
      Cultivar Cauliflower_summer
        Command:
          [Nodule].FixationMetabolicCost.FixedValue = 0
          [Nodule].FixationRate.FixedValue = 0
          [Phenology].CanopyExpanding.Target.FixedValue = 1422.0
          [Phenology].Senescing.Target.FixedValue = 900
          [Phenology].YieldIncreasing.Target.FixedValue = 678.0
          [Product].DryMatterContent.FixedValue = 0.09
          [Product].ExpectedYield.FixedValue = 5000
          [Product].HarvestIndex.FixedValue = 0.45
          [Product].MaximumNConc.FixedValue = 0.035
          [Product].MinimumNConc.FixedValue = 0.0245
          [Root].KLModifier.XYPairs.Y = 1,1,1,1,1,1,1,0.472,0.223,0.105,0,0,0,0,0,0,0,0,0,0,0,0,0,0,0,0,0,0,0,0
          [Root].MaximumNConc.FixedValue = 0.009
          [Root].MaximumRootDepth.FixedValue = 500
          [Root].MinimumNConc.FixedValue = 0.009
          [Root].RootProportion.FixedValue = 0.1
          [Stover].Cover.Expanding.SigCoverFunction.Xo.FixedValue = 450
          [Stover].Cover.Expanding.SigCoverFunction.Ymax.FixedValue = 0.8
          [Stover].Cover.Expanding.SigCoverFunction.b.FixedValue = 120
          [Stover].MaximumNConc.FixedValue = 0.038
          [Stover].MinimumNConc.FixedValue = 0.038
          [Stover].XoBiomass.FixedValue = 1500.0
          [Stover].bBiomass.FixedValue = 300.0
      Cultivar Cauliflower_winter_spring
        Command:
          [Nodule].FixationMetabolicCost.FixedValue = 0
          [Nodule].FixationRate.FixedValue = 0
          [Phenology].CanopyExpanding.Target.FixedValue = 1566.0
          [Phenology].Senescing.Target.FixedValue = 900
          [Phenology].YieldIncreasing.Target.FixedValue = 534.0
          [Product].DryMatterContent.FixedValue = 0.1
          [Product].ExpectedYield.FixedValue = 3000
          [Product].HarvestIndex.FixedValue = 0.3
          [Product].MaximumNConc.FixedValue = 0.035
          [Product].MinimumNConc.FixedValue = 0.0245
          [Root].KLModifier.XYPairs.Y = 1,1,1,1,1,1,1,0.472,0.223,0.105,0,0,0,0,0,0,0,0,0,0,0,0,0,0,0,0,0,0,0,0
          [Root].MaximumNConc.FixedValue = 0.009
          [Root].MaximumRootDepth.FixedValue = 500
          [Root].MinimumNConc.FixedValue = 0.009
          [Root].RootProportion.FixedValue = 0.1
          [Stover].Cover.Expanding.SigCoverFunction.Xo.FixedValue = 450
          [Stover].Cover.Expanding.SigCoverFunction.Ymax.FixedValue = 0.8
          [Stover].Cover.Expanding.SigCoverFunction.b.FixedValue = 120
          [Stover].MaximumNConc.FixedValue = 0.038
          [Stover].MinimumNConc.FixedValue = 0.038
          [Stover].XoBiomass.FixedValue = 1500.0
          [Stover].bBiomass.FixedValue = 300.0
      Cultivar Chicory_Seed
        Command:
          [Nodule].FixationMetabolicCost.FixedValue = 0
          [Nodule].FixationRate.FixedValue = 0
          [Phenology].CanopyExpanding.Target.FixedValue = 2587.0
          [Phenology].Senescing.Target.FixedValue = 300
          [Phenology].YieldIncreasing.Target.FixedValue = 1347.0
          [Product].DryMatterContent.FixedValue = 0.85
          [Product].ExpectedYield.FixedValue = 150
          [Product].HarvestIndex.FixedValue = 0.05
          [Product].MaximumNConc.FixedValue = 0.03
          [Product].MinimumNConc.FixedValue = 0.0105
          [Root].KLModifier.XYPairs.Y = 1,1,1,1,1,1,1,0.807,0.651,0.526,0.424,0.343,0.276,0.223,0.18,0.145,0.117,0.095,0.076,0.062,0,0,0,0,0,0,0,0,0,0
          [Root].MaximumNConc.FixedValue = 0.01
          [Root].MaximumRootDepth.FixedValue = 1000
          [Root].MinimumNConc.FixedValue = 0.01
          [Root].RootProportion.FixedValue = 0.1
          [Stover].Cover.Expanding.SigCoverFunction.Xo.FixedValue = 690
          [Stover].Cover.Expanding.SigCoverFunction.Ymax.FixedValue = 0.95
          [Stover].Cover.Expanding.SigCoverFunction.b.FixedValue = 120
          [Stover].MaximumNConc.FixedValue = 0.015
          [Stover].MinimumNConc.FixedValue = 0.01
          [Stover].XoBiomass.FixedValue = 2117.0
          [Stover].bBiomass.FixedValue = 423.7
      Cultivar Clover_1styear
        Command:
          [Nodule].FixationMetabolicCost.FixedValue = 0
          [Nodule].FixationRate.FixedValue = 1000
          [Phenology].CanopyExpanding.Target.FixedValue = 2141.0
          [Phenology].Senescing.Target.FixedValue = 300
          [Phenology].YieldIncreasing.Target.FixedValue = 1159.0
          [Product].DryMatterContent.FixedValue = 0.85
          [Product].ExpectedYield.FixedValue = 60
          [Product].HarvestIndex.FixedValue = 0.09
          [Product].MaximumNConc.FixedValue = 0.035
          [Product].MinimumNConc.FixedValue = 0.0245
          [Root].KLModifier.XYPairs.Y = 1,1,1,1,1,1,1,0.779,0.607,0.472,0.368,0.287,0.223,0.174,0.135,0.105,0.082,0.064,0,0,0,0,0,0,0,0,0,0,0,0
          [Root].MaximumNConc.FixedValue = 0.01
          [Root].MaximumRootDepth.FixedValue = 900
          [Root].MinimumNConc.FixedValue = 0.01
          [Root].RootProportion.FixedValue = 0.1
          [Stover].Cover.Expanding.SigCoverFunction.Xo.FixedValue = 750
          [Stover].Cover.Expanding.SigCoverFunction.Ymax.FixedValue = 0.8
          [Stover].Cover.Expanding.SigCoverFunction.b.FixedValue = 120
          [Stover].MaximumNConc.FixedValue = 0.04
          [Stover].MinimumNConc.FixedValue = 0.04
          [Stover].XoBiomass.FixedValue = 1800.0
          [Stover].bBiomass.FixedValue = 360.0
      Cultivar Clover_2ndyear
        Command:
          [Nodule].FixationMetabolicCost.FixedValue = 0
          [Nodule].FixationRate.FixedValue = 1000
          [Phenology].CanopyExpanding.Target.FixedValue = 1249.0
          [Phenology].Senescing.Target.FixedValue = 300
          [Phenology].YieldIncreasing.Target.FixedValue = 551.0
          [Product].DryMatterContent.FixedValue = 0.85
          [Product].ExpectedYield.FixedValue = 60
          [Product].HarvestIndex.FixedValue = 0.09
          [Product].MaximumNConc.FixedValue = 0.037
          [Product].MinimumNConc.FixedValue = 0.0245
          [Root].KLModifier.XYPairs.Y = 1,1,1,1,1,1,1,0.779,0.607,0.472,0.368,0.287,0.223,0.174,0.135,0.105,0.082,0.064,0,0,0,0,0,0,0,0,0,0,0,0
          [Root].MaximumNConc.FixedValue = 0.01
          [Root].MaximumRootDepth.FixedValue = 900
          [Root].MinimumNConc.FixedValue = 0.01
          [Root].RootProportion.FixedValue = 0.1
          [Stover].Cover.Expanding.SigCoverFunction.Xo.FixedValue = 300
          [Stover].Cover.Expanding.SigCoverFunction.Ymax.FixedValue = 0.96
          [Stover].Cover.Expanding.SigCoverFunction.b.FixedValue = 120
          [Stover].MaximumNConc.FixedValue = 0.04
          [Stover].MinimumNConc.FixedValue = 0.04
          [Stover].XoBiomass.FixedValue = 1050.0
          [Stover].bBiomass.FixedValue = 210.0
      Cultivar Corn_Salad
        Command:
          [Nodule].FixationMetabolicCost.FixedValue = 0
          [Nodule].FixationRate.FixedValue = 0
          [Phenology].CanopyExpanding.Target.FixedValue = 1461.0
          [Phenology].Senescing.Target.FixedValue = 600
          [Phenology].YieldIncreasing.Target.FixedValue = 939.0
          [Product].DryMatterContent.FixedValue = 0.87
          [Product].ExpectedYield.FixedValue = 100
          [Product].HarvestIndex.FixedValue = 0.1
          [Product].MaximumNConc.FixedValue = 0.0205
          [Product].MinimumNConc.FixedValue = 0.01
          [Root].KLModifier.XYPairs.Y = 1,1,1,1,1,1,1,0.779,0.607,0.472,0.368,0.287,0.223,0.174,0.135,0.105,0.082,0.064,0,0,0,0,0,0,0,0,0,0,0,0
          [Root].MaximumNConc.FixedValue = 0.01
          [Root].MaximumRootDepth.FixedValue = 900
          [Root].MinimumNConc.FixedValue = 0.01
          [Root].RootProportion.FixedValue = 0.1
          [Stover].Cover.Expanding.SigCoverFunction.Xo.FixedValue = 540
          [Stover].Cover.Expanding.SigCoverFunction.Ymax.FixedValue = 0.96
          [Stover].Cover.Expanding.SigCoverFunction.b.FixedValue = 120
          [Stover].MaximumNConc.FixedValue = 0.0069
          [Stover].MinimumNConc.FixedValue = 0.0069
          [Stover].XoBiomass.FixedValue = 1500.0
          [Stover].bBiomass.FixedValue = 300.0
      Cultivar Dried_Beans
        Command:
          [Nodule].FixationMetabolicCost.FixedValue = 0
          [Nodule].FixationRate.FixedValue = 1000
          [Phenology].CanopyExpanding.Target.FixedValue = 755.0
          [Phenology].Senescing.Target.FixedValue = 300
          [Phenology].YieldIncreasing.Target.FixedValue = 595.0
          [Product].DryMatterContent.FixedValue = 0.86
          [Product].ExpectedYield.FixedValue = 350
          [Product].HarvestIndex.FixedValue = 0.5
          [Product].MaximumNConc.FixedValue = 0.035
          [Product].MinimumNConc.FixedValue = 0.0245
          [Root].KLModifier.XYPairs.Y = 1,1,1,1,1,1,1,0.687,0.472,0.325,0.223,0.153,0.105,0.072,0,0,0,0,0,0,0,0,0,0,0,0,0,0,0,0
          [Root].MaximumNConc.FixedValue = 0.015
          [Root].MaximumRootDepth.FixedValue = 700
          [Root].MinimumNConc.FixedValue = 0.015
          [Root].RootProportion.FixedValue = 0.1
          [Stover].Cover.Expanding.SigCoverFunction.Xo.FixedValue = 690
          [Stover].Cover.Expanding.SigCoverFunction.Ymax.FixedValue = 0.96
          [Stover].Cover.Expanding.SigCoverFunction.b.FixedValue = 60
          [Stover].MaximumNConc.FixedValue = 0.02
          [Stover].MinimumNConc.FixedValue = 0.02
          [Stover].XoBiomass.FixedValue = 825.0
          [Stover].bBiomass.FixedValue = 165.0
      Cultivar Dried_Peas
        Command:
          [Nodule].FixationMetabolicCost.FixedValue = 0
          [Nodule].FixationRate.FixedValue = 1000
          [Phenology].CanopyExpanding.Target.FixedValue = 755.0
          [Phenology].Senescing.Target.FixedValue = 300
          [Phenology].YieldIncreasing.Target.FixedValue = 595.0
          [Product].DryMatterContent.FixedValue = 0.86
          [Product].ExpectedYield.FixedValue = 350
          [Product].HarvestIndex.FixedValue = 0.5
          [Product].MaximumNConc.FixedValue = 0.035
          [Product].MinimumNConc.FixedValue = 0.0245
          [Root].KLModifier.XYPairs.Y = 1,1,1,1,1,1,1,0.846,0.717,0.607,0.513,0.435,0.368,0.311,0.264,0.223,0.189,0.16,0.135,0.115,0.097,0.082,0.069,0.059,0,0,0,0,0,0
          [Root].MaximumNConc.FixedValue = 0.015
          [Root].MaximumRootDepth.FixedValue = 1200
          [Root].MinimumNConc.FixedValue = 0.015
          [Root].RootProportion.FixedValue = 0.1
          [Stover].Cover.Expanding.SigCoverFunction.Xo.FixedValue = 690
          [Stover].Cover.Expanding.SigCoverFunction.Ymax.FixedValue = 0.96
          [Stover].Cover.Expanding.SigCoverFunction.b.FixedValue = 60
          [Stover].MaximumNConc.FixedValue = 0.02
          [Stover].MinimumNConc.FixedValue = 0.02
          [Stover].XoBiomass.FixedValue = 825.0
          [Stover].bBiomass.FixedValue = 165.0
      Cultivar Green_Beans
        Command:
          [Nodule].FixationMetabolicCost.FixedValue = 0
          [Nodule].FixationRate.FixedValue = 1000
          [Phenology].CanopyExpanding.Target.FixedValue = 782.0
          [Phenology].Senescing.Target.FixedValue = 300
          [Phenology].YieldIncreasing.Target.FixedValue = 568.0
          [Product].DryMatterContent.FixedValue = 0.21
          [Product].ExpectedYield.FixedValue = 800
          [Product].HarvestIndex.FixedValue = 0.45
          [Product].MaximumNConc.FixedValue = 0.035
          [Product].MinimumNConc.FixedValue = 0.0245
          [Root].KLModifier.XYPairs.Y = 1,1,1,1,1,1,1,0.687,0.472,0.325,0.223,0.153,0.105,0.072,0,0,0,0,0,0,0,0,0,0,0,0,0,0,0,0
          [Root].MaximumNConc.FixedValue = 0.015
          [Root].MaximumRootDepth.FixedValue = 700
          [Root].MinimumNConc.FixedValue = 0.015
          [Root].RootProportion.FixedValue = 0.1
          [Stover].Cover.Expanding.SigCoverFunction.Xo.FixedValue = 690
          [Stover].Cover.Expanding.SigCoverFunction.Ymax.FixedValue = 0.8
          [Stover].Cover.Expanding.SigCoverFunction.b.FixedValue = 60
          [Stover].MaximumNConc.FixedValue = 0.03
          [Stover].MinimumNConc.FixedValue = 0.03
          [Stover].XoBiomass.FixedValue = 825.0
          [Stover].bBiomass.FixedValue = 165.0
      Cultivar Green_Peas
        Command:
          [Nodule].FixationMetabolicCost.FixedValue = 0
          [Nodule].FixationRate.FixedValue = 1000
          [Phenology].CanopyExpanding.Target.FixedValue = 782.0
          [Phenology].Senescing.Target.FixedValue = 300
          [Phenology].YieldIncreasing.Target.FixedValue = 568.0
          [Product].DryMatterContent.FixedValue = 0.21
          [Product].ExpectedYield.FixedValue = 800
          [Product].HarvestIndex.FixedValue = 0.45
          [Product].MaximumNConc.FixedValue = 0.035
          [Product].MinimumNConc.FixedValue = 0.0245
          [Root].KLModifier.XYPairs.Y = 1,1,1,1,1,1,1,0.846,0.717,0.607,0.513,0.435,0.368,0.311,0.264,0.223,0.189,0.16,0.135,0.115,0.097,0.082,0.069,0.059,0,0,0,0,0,0
          [Root].MaximumNConc.FixedValue = 0.015
          [Root].MaximumRootDepth.FixedValue = 1200
          [Root].MinimumNConc.FixedValue = 0.015
          [Root].RootProportion.FixedValue = 0.1
          [Stover].Cover.Expanding.SigCoverFunction.Xo.FixedValue = 690
          [Stover].Cover.Expanding.SigCoverFunction.Ymax.FixedValue = 0.96
          [Stover].Cover.Expanding.SigCoverFunction.b.FixedValue = 60
          [Stover].MaximumNConc.FixedValue = 0.03
          [Stover].MinimumNConc.FixedValue = 0.03
          [Stover].XoBiomass.FixedValue = 825.0
          [Stover].bBiomass.FixedValue = 165.0
      Cultivar FodderBeet
        Command:
          [Nodule].FixationMetabolicCost.FixedValue = 0
          [Nodule].FixationRate.FixedValue = 0
          [Phenology].CanopyExpanding.Target.FixedValue = 1150.0
          [Phenology].Senescing.Target.FixedValue = 0
          [Phenology].YieldIncreasing.Target.FixedValue = 1850.0
          [Product].DryMatterContent.FixedValue = 0.16
          [Product].ExpectedYield.FixedValue = 12000
          [Product].HarvestIndex.FixedValue = 0.7
          [Product].MaximumNConc.FixedValue = 0.025
          [Product].MinimumNConc.FixedValue = 0.15
          [Root].KLModifier.XYPairs.Y = 1,1,1,1,1,1,1,0.946,0.895,0.846,0.801,0.757,0.717,0.678,0.641,0.607,0.574,0.543,0.513,0.486,0.459,0.435,0.411,0.389,0.368,0.348,0.329,0.311,0.295,0.279
          [Root].MaximumNConc.FixedValue = 0.008
          [Root].MaximumRootDepth.FixedValue = 3000
          [Root].MinimumNConc.FixedValue = 0.008
          [Root].RootProportion.FixedValue = 0.1
          [Stover].Cover.Expanding.SigCoverFunction.Xo.FixedValue = 867
          [Stover].Cover.Expanding.SigCoverFunction.Ymax.FixedValue = 0.96
          [Stover].Cover.Expanding.SigCoverFunction.b.FixedValue = 141
          [Stover].MaximumNConc.FixedValue = 0.01
          [Stover].MinimumNConc.FixedValue = 0.01
          [Stover].XoBiomass.FixedValue = 1500.0
          [Stover].bBiomass.FixedValue = 300.0
      Cultivar Italian_Ryegrass
        Command:
          [Nodule].FixationMetabolicCost.FixedValue = 0
          [Nodule].FixationRate.FixedValue = 0
          [Phenology].CanopyExpanding.Target.FixedValue = 1590.0
          [Phenology].Senescing.Target.FixedValue = 450
          [Phenology].YieldIncreasing.Target.FixedValue = 660.0
          [Product].DryMatterContent.FixedValue = 0.85
          [Product].ExpectedYield.FixedValue = 350
          [Product].HarvestIndex.FixedValue = 0.15
          [Product].MaximumNConc.FixedValue = 0.0205
          [Product].MinimumNConc.FixedValue = 0.01
          [Root].KLModifier.XYPairs.Y = 1,1,1,1,1,1,1,0.807,0.651,0.526,0.424,0.343,0.276,0.223,0.18,0.145,0.117,0.095,0.076,0.062,0,0,0,0,0,0,0,0,0,0
          [Root].MaximumNConc.FixedValue = 0.01
          [Root].MaximumRootDepth.FixedValue = 1000
          [Root].MinimumNConc.FixedValue = 0.01
          [Root].RootProportion.FixedValue = 0.1
          [Stover].Cover.Expanding.SigCoverFunction.Xo.FixedValue = 540
          [Stover].Cover.Expanding.SigCoverFunction.Ymax.FixedValue = 0.96
          [Stover].Cover.Expanding.SigCoverFunction.b.FixedValue = 120
          [Stover].MaximumNConc.FixedValue = 0.0069
          [Stover].MinimumNConc.FixedValue = 0.0069
          [Stover].XoBiomass.FixedValue = 900.0
          [Stover].bBiomass.FixedValue = 180.0
      Cultivar Kale
        Command:
          [Nodule].FixationMetabolicCost.FixedValue = 0
          [Nodule].FixationRate.FixedValue = 0
          [Phenology].CanopyExpanding.Target.FixedValue = 1150.0
          [Phenology].Senescing.Target.FixedValue = 0
          [Phenology].YieldIncreasing.Target.FixedValue = 1850.0
          [Product].DryMatterContent.FixedValue = 0.16
          [Product].ExpectedYield.FixedValue = 7500
          [Product].HarvestIndex.FixedValue = 0.7
          [Product].MaximumNConc.FixedValue = 0.03
          [Product].MinimumNConc.FixedValue = 0.02
          [Root].KLModifier.XYPairs.Y = 1,1,1,1,1,1,1,0.946,0.895,0.846,0.801,0.757,0.717,0.678,0.641,0.607,0.574,0.543,0.513,0.486,0.459,0.435,0.411,0.389,0.368,0.348,0.329,0.311,0.295,0.279
          [Root].MaximumNConc.FixedValue = 0.008
          [Root].MaximumRootDepth.FixedValue = 3000
          [Root].MinimumNConc.FixedValue = 0.008
          [Root].RootProportion.FixedValue = 0.1
          [Stover].Cover.Expanding.SigCoverFunction.Xo.FixedValue = 867
          [Stover].Cover.Expanding.SigCoverFunction.Ymax.FixedValue = 0.96
          [Stover].Cover.Expanding.SigCoverFunction.b.FixedValue = 141
          [Stover].MaximumNConc.FixedValue = 0.01
          [Stover].MinimumNConc.FixedValue = 0.01
          [Stover].XoBiomass.FixedValue = 1500.0
          [Stover].bBiomass.FixedValue = 300.0
      Cultivar Kumara
        Command:
          [Nodule].FixationMetabolicCost.FixedValue = 0
          [Nodule].FixationRate.FixedValue = 0
          [Phenology].CanopyExpanding.Target.FixedValue = 716.0
          [Phenology].Senescing.Target.FixedValue = 750
          [Phenology].YieldIncreasing.Target.FixedValue = 1234.0
          [Product].DryMatterContent.FixedValue = 0.23
          [Product].ExpectedYield.FixedValue = 5000
          [Product].HarvestIndex.FixedValue = 0.89
          [Product].MaximumNConc.FixedValue = 0.018
          [Product].MinimumNConc.FixedValue = 0.0126
          [Root].KLModifier.XYPairs.Y = 1,1,1,1,1,1,1,0.472,0.223,0.105,0,0,0,0,0,0,0,0,0,0,0,0,0,0,0,0,0,0,0,0
          [Root].MaximumNConc.FixedValue = 0.01
          [Root].MaximumRootDepth.FixedValue = 500
          [Root].MinimumNConc.FixedValue = 0.01
          [Root].RootProportion.FixedValue = 0.1
          [Stover].Cover.Expanding.SigCoverFunction.Xo.FixedValue = 690
          [Stover].Cover.Expanding.SigCoverFunction.Ymax.FixedValue = 0.96
          [Stover].Cover.Expanding.SigCoverFunction.b.FixedValue = 120
          [Stover].MaximumNConc.FixedValue = 0.02
          [Stover].MinimumNConc.FixedValue = 0.02
          [Stover].XoBiomass.FixedValue = 1350.0
          [Stover].bBiomass.FixedValue = 270.0
      Cultivar Lentils: same as Replacements.SCRUM.Dried_Beans
      Cultivar Lettuce
        Command:
          [Nodule].FixationMetabolicCost.FixedValue = 0
          [Nodule].FixationRate.FixedValue = 0
          [Phenology].CanopyExpanding.Target.FixedValue = 1299.0
          [Phenology].Senescing.Target.FixedValue = 600
          [Phenology].YieldIncreasing.Target.FixedValue = 2001.0
          [Product].DryMatterContent.FixedValue = 0.05
          [Product].ExpectedYield.FixedValue = 5000
          [Product].HarvestIndex.FixedValue = 0.8
          [Product].MaximumNConc.FixedValue = 0.026
          [Product].MinimumNConc.FixedValue = 0.0182
          [Root].KLModifier.XYPairs.Y = 1,1,1,1,1,1,1,0.472,0.223,0.105,0,0,0,0,0,0,0,0,0,0,0,0,0,0,0,0,0,0,0,0
          [Root].MaximumNConc.FixedValue = 0.009
          [Root].MaximumRootDepth.FixedValue = 500
          [Root].MinimumNConc.FixedValue = 0.009
          [Root].RootProportion.FixedValue = 0.1
          [Stover].Cover.Expanding.SigCoverFunction.Xo.FixedValue = 360
          [Stover].Cover.Expanding.SigCoverFunction.Ymax.FixedValue = 0.8
          [Stover].Cover.Expanding.SigCoverFunction.b.FixedValue = 120
          [Stover].MaximumNConc.FixedValue = 0.03
          [Stover].MinimumNConc.FixedValue = 0.03
          [Stover].XoBiomass.FixedValue = 1950.0
          [Stover].bBiomass.FixedValue = 390.0
      Cultivar Linseed
        Command:
          [Nodule].FixationMetabolicCost.FixedValue = 0
          [Nodule].FixationRate.FixedValue = 0
          [Phenology].CanopyExpanding.Target.FixedValue = 1564.0
          [Phenology].Senescing.Target.FixedValue = 300
          [Phenology].YieldIncreasing.Target.FixedValue = 1107.0
          [Product].DryMatterContent.FixedValue = 0.87
          [Product].ExpectedYield.FixedValue = 300
          [Product].HarvestIndex.FixedValue = 0.3
          [Product].MaximumNConc.FixedValue = 0.03
          [Product].MinimumNConc.FixedValue = 0.0091
          [Root].KLModifier.XYPairs.Y = 1,1,1,1,1,1,1,0.807,0.651,0.526,0.424,0.343,0.276,0.223,0.18,0.145,0.117,0.095,0.076,0.062,0,0,0,0,0,0,0,0,0,0
          [Root].MaximumNConc.FixedValue = 0.009
          [Root].MaximumRootDepth.FixedValue = 1000
          [Root].MinimumNConc.FixedValue = 0.009
          [Root].RootProportion.FixedValue = 0.1
          [Stover].Cover.Expanding.SigCoverFunction.Xo.FixedValue = 540
          [Stover].Cover.Expanding.SigCoverFunction.Ymax.FixedValue = 0.96
          [Stover].Cover.Expanding.SigCoverFunction.b.FixedValue = 120
          [Stover].MaximumNConc.FixedValue = 0.015
          [Stover].MinimumNConc.FixedValue = 0.01
          [Stover].XoBiomass.FixedValue = 1470.0
          [Stover].bBiomass.FixedValue = 294.0
      Cultivar Lupins
        Command:
          [Nodule].FixationMetabolicCost.FixedValue = 0
          [Nodule].FixationRate.FixedValue = 1000
          [Phenology].CanopyExpanding.Target.FixedValue = 420.0
          [Phenology].Senescing.Target.FixedValue = 0
          [Phenology].YieldIncreasing.Target.FixedValue = 1230.0
          [Product].DryMatterContent.FixedValue = 1.0
          [Product].ExpectedYield.FixedValue = 1200
          [Product].HarvestIndex.FixedValue = 0.9
          [Product].MaximumNConc.FixedValue = 0.03
          [Product].MinimumNConc.FixedValue = 0.021
          [Root].KLModifier.XYPairs.Y = 1,1,1,1,1,1,1,0.687,0.472,0.325,0.223,0.153,0.105,0.072,0,0,0,0,0,0,0,0,0,0,0,0,0,0,0,0
          [Root].MaximumNConc.FixedValue = 0.015
          [Root].MaximumRootDepth.FixedValue = 700
          [Root].MinimumNConc.FixedValue = 0.015
          [Root].RootProportion.FixedValue = 0.1
          [Stover].Cover.Expanding.SigCoverFunction.Xo.FixedValue = 690
          [Stover].Cover.Expanding.SigCoverFunction.Ymax.FixedValue = 0.96
          [Stover].Cover.Expanding.SigCoverFunction.b.FixedValue = 60
          [Stover].MaximumNConc.FixedValue = 0.03
          [Stover].MinimumNConc.FixedValue = 0.03
          [Stover].XoBiomass.FixedValue = 825.0
          [Stover].bBiomass.FixedValue = 165.0
      Cultivar Maize_Long
        Command:
          [Nodule].FixationMetabolicCost.FixedValue = 0
          [Nodule].FixationRate.FixedValue = 0
          [Phenology].CanopyExpanding.Target.FixedValue = 1923.0
          [Phenology].Senescing.Target.FixedValue = 1800
          [Phenology].YieldIncreasing.Target.FixedValue = 477.0
          [Product].DryMatterContent.FixedValue = 0.87
          [Product].ExpectedYield.FixedValue = 1350
          [Product].HarvestIndex.FixedValue = 0.5
          [Product].MaximumNConc.FixedValue = 0.014
          [Product].MinimumNConc.FixedValue = 0.0098
          [Root].KLModifier.XYPairs.Y = 1,1,1,1,1,1,1,0.882,0.779,0.687,0.607,0.535,0.472,0.417,0.368,0.325,0.287,0.253,0.223,0.197,0.174,0.153,0.135,0.119,0.105,0.093,0.082,0.072,0.064,0.056
          [Root].MaximumNConc.FixedValue = 0.007
          [Root].MaximumRootDepth.FixedValue = 1500
          [Root].MinimumNConc.FixedValue = 0.007
          [Root].RootProportion.FixedValue = 0.1
          [Stover].Cover.Expanding.SigCoverFunction.Xo.FixedValue = 1050
          [Stover].Cover.Expanding.SigCoverFunction.Ymax.FixedValue = 0.92
          [Stover].Cover.Expanding.SigCoverFunction.b.FixedValue = 180
          [Stover].MaximumNConc.FixedValue = 0.007
          [Stover].MinimumNConc.FixedValue = 0.007
          [Stover].XoBiomass.FixedValue = 2100.0
          [Stover].bBiomass.FixedValue = 420.0
      Cultivar Maize_Med
        Command:
          [Nodule].FixationMetabolicCost.FixedValue = 0
          [Nodule].FixationRate.FixedValue = 0
          [Phenology].CanopyExpanding.Target.FixedValue = 1785.0
          [Phenology].Senescing.Target.FixedValue = 1650
          [Phenology].YieldIncreasing.Target.FixedValue = 465.0
          [Product].DryMatterContent.FixedValue = 0.87
          [Product].ExpectedYield.FixedValue = 1330
          [Product].HarvestIndex.FixedValue = 0.5
          [Product].MaximumNConc.FixedValue = 0.014
          [Product].MinimumNConc.FixedValue = 0.0098
          [Root].KLModifier.XYPairs.Y = 1,1,1,1,1,1,1,0.882,0.779,0.687,0.607,0.535,0.472,0.417,0.368,0.325,0.287,0.253,0.223,0.197,0.174,0.153,0.135,0.119,0.105,0.093,0.082,0.072,0.064,0.056
          [Root].MaximumNConc.FixedValue = 0.007
          [Root].MaximumRootDepth.FixedValue = 1500
          [Root].MinimumNConc.FixedValue = 0.007
          [Root].RootProportion.FixedValue = 0.1
          [Stover].Cover.Expanding.SigCoverFunction.Xo.FixedValue = 960
          [Stover].Cover.Expanding.SigCoverFunction.Ymax.FixedValue = 0.85
          [Stover].Cover.Expanding.SigCoverFunction.b.FixedValue = 180
          [Stover].MaximumNConc.FixedValue = 0.007
          [Stover].MinimumNConc.FixedValue = 0.007
          [Stover].XoBiomass.FixedValue = 1950.0
          [Stover].bBiomass.FixedValue = 390.0
      Cultivar Maize_Short
        Command:
          [Nodule].FixationMetabolicCost.FixedValue = 0
          [Nodule].FixationRate.FixedValue = 0
          [Phenology].CanopyExpanding.Target.FixedValue = 1648.0
          [Phenology].Senescing.Target.FixedValue = 1500
          [Phenology].YieldIncreasing.Target.FixedValue = 452.0
          [Product].DryMatterContent.FixedValue = 0.87
          [Product].ExpectedYield.FixedValue = 1220
          [Product].HarvestIndex.FixedValue = 0.5
          [Product].MaximumNConc.FixedValue = 0.014
          [Product].MinimumNConc.FixedValue = 0.0098
          [Root].KLModifier.XYPairs.Y = 1,1,1,1,1,1,1,0.882,0.779,0.687,0.607,0.535,0.472,0.417,0.368,0.325,0.287,0.253,0.223,0.197,0.174,0.153,0.135,0.119,0.105,0.093,0.082,0.072,0.064,0.056
          [Root].MaximumNConc.FixedValue = 0.007
          [Root].MaximumRootDepth.FixedValue = 1500
          [Root].MinimumNConc.FixedValue = 0.007
          [Root].RootProportion.FixedValue = 0.1
          [Stover].Cover.Expanding.SigCoverFunction.Xo.FixedValue = 900
          [Stover].Cover.Expanding.SigCoverFunction.Ymax.FixedValue = 0.75
          [Stover].Cover.Expanding.SigCoverFunction.b.FixedValue = 180
          [Stover].MaximumNConc.FixedValue = 0.007
          [Stover].MinimumNConc.FixedValue = 0.007
          [Stover].XoBiomass.FixedValue = 1800.0
          [Stover].bBiomass.FixedValue = 360.0
      Cultivar Maizesilage
        Command:
          [Nodule].FixationMetabolicCost.FixedValue = 0
          [Nodule].FixationRate.FixedValue = 0
          [Phenology].CanopyExpanding.Target.FixedValue = 652.0
          [Phenology].Senescing.Target.FixedValue = 1350
          [Phenology].YieldIncreasing.Target.FixedValue = 1598.0
          [Product].DryMatterContent.FixedValue = 0.35
          [Product].ExpectedYield.FixedValue = 5000
          [Product].HarvestIndex.FixedValue = 0.95
          [Product].MaximumNConc.FixedValue = 0.014
          [Product].MinimumNConc.FixedValue = 0.0098
          [Root].KLModifier.XYPairs.Y = 1,1,1,1,1,1,1,0.882,0.779,0.687,0.607,0.535,0.472,0.417,0.368,0.325,0.287,0.253,0.223,0.197,0.174,0.153,0.135,0.119,0.105,0.093,0.082,0.072,0.064,0.056
          [Root].MaximumNConc.FixedValue = 0.007
          [Root].MaximumRootDepth.FixedValue = 1500
          [Root].MinimumNConc.FixedValue = 0.007
          [Root].RootProportion.FixedValue = 0.1
          [Stover].Cover.Expanding.SigCoverFunction.Xo.FixedValue = 960
          [Stover].Cover.Expanding.SigCoverFunction.Ymax.FixedValue = 0.85
          [Stover].Cover.Expanding.SigCoverFunction.b.FixedValue = 180
          [Stover].MaximumNConc.FixedValue = 0.007
          [Stover].MinimumNConc.FixedValue = 0.007
          [Stover].XoBiomass.FixedValue = 1800.0
          [Stover].bBiomass.FixedValue = 360.0
      Cultivar Mustard
        Command:
          [Nodule].FixationMetabolicCost.FixedValue = 0
          [Nodule].FixationRate.FixedValue = 0
          [Phenology].CanopyExpanding.Target.FixedValue = 420.0
          [Phenology].Senescing.Target.FixedValue = 0
          [Phenology].YieldIncreasing.Target.FixedValue = 1230.0
          [Product].DryMatterContent.FixedValue = 1.0
          [Product].ExpectedYield.FixedValue = 700
          [Product].HarvestIndex.FixedValue = 0.9
          [Product].MaximumNConc.FixedValue = 0.03
          [Product].MinimumNConc.FixedValue = 0.021
          [Root].KLModifier.XYPairs.Y = 1,1,1,1,1,1,1,0.687,0.472,0.325,0.223,0.153,0.105,0.072,0,0,0,0,0,0,0,0,0,0,0,0,0,0,0,0
          [Root].MaximumNConc.FixedValue = 0.01
          [Root].MaximumRootDepth.FixedValue = 700
          [Root].MinimumNConc.FixedValue = 0.01
          [Root].RootProportion.FixedValue = 0.1
          [Stover].Cover.Expanding.SigCoverFunction.Xo.FixedValue = 690
          [Stover].Cover.Expanding.SigCoverFunction.Ymax.FixedValue = 0.96
          [Stover].Cover.Expanding.SigCoverFunction.b.FixedValue = 60
          [Stover].MaximumNConc.FixedValue = 0.03
          [Stover].MinimumNConc.FixedValue = 0.03
          [Stover].XoBiomass.FixedValue = 825.0
          [Stover].bBiomass.FixedValue = 165.0
      Cultivar Mustard_Seed
        Command:
          [Nodule].FixationMetabolicCost.FixedValue = 0
          [Nodule].FixationRate.FixedValue = 0
          [Phenology].CanopyExpanding.Target.FixedValue = 1737.0
          [Phenology].Senescing.Target.FixedValue = 300
          [Phenology].YieldIncreasing.Target.FixedValue = 904.0
          [Product].DryMatterContent.FixedValue = 0.84
          [Product].ExpectedYield.FixedValue = 100
          [Product].HarvestIndex.FixedValue = 0.1
          [Product].MaximumNConc.FixedValue = 0.03
          [Product].MinimumNConc.FixedValue = 0.02
          [Root].KLModifier.XYPairs.Y = 1,1,1,1,1,1,1,0.807,0.651,0.526,0.424,0.343,0.276,0.223,0.18,0.145,0.117,0.095,0.076,0.062,0,0,0,0,0,0,0,0,0,0
          [Root].MaximumNConc.FixedValue = 0.008
          [Root].MaximumRootDepth.FixedValue = 1000
          [Root].MinimumNConc.FixedValue = 0.008
          [Root].RootProportion.FixedValue = 0.1
          [Stover].Cover.Expanding.SigCoverFunction.Xo.FixedValue = 540
          [Stover].Cover.Expanding.SigCoverFunction.Ymax.FixedValue = 0.96
          [Stover].Cover.Expanding.SigCoverFunction.b.FixedValue = 120
          [Stover].MaximumNConc.FixedValue = 0.015
          [Stover].MinimumNConc.FixedValue = 0.01
          [Stover].XoBiomass.FixedValue = 1470.0
          [Stover].bBiomass.FixedValue = 294.0
      Cultivar Oats&Rye
        Command:
          [Nodule].FixationMetabolicCost.FixedValue = 0
          [Nodule].FixationRate.FixedValue = 0
          [Phenology].CanopyExpanding.Target.FixedValue = 458.0
          [Phenology].Senescing.Target.FixedValue = 0
          [Phenology].YieldIncreasing.Target.FixedValue = 1342.0
          [Product].DryMatterContent.FixedValue = 1.0
          [Product].ExpectedYield.FixedValue = 1000
          [Product].HarvestIndex.FixedValue = 0.9
          [Product].MaximumNConc.FixedValue = 0.012
          [Product].MinimumNConc.FixedValue = 0.0084
          [Root].KLModifier.XYPairs.Y = 1,1,1,1,1,1,1,0.807,0.651,0.526,0.424,0.343,0.276,0.223,0.18,0.145,0.117,0.095,0.076,0.062,0,0,0,0,0,0,0,0,0,0
          [Root].MaximumNConc.FixedValue = 0.009
          [Root].MaximumRootDepth.FixedValue = 1000
          [Root].MinimumNConc.FixedValue = 0.009
          [Root].RootProportion.FixedValue = 0.1
          [Stover].Cover.Expanding.SigCoverFunction.Xo.FixedValue = 540
          [Stover].Cover.Expanding.SigCoverFunction.Ymax.FixedValue = 0.96
          [Stover].Cover.Expanding.SigCoverFunction.b.FixedValue = 120
          [Stover].MaximumNConc.FixedValue = 0.012
          [Stover].MinimumNConc.FixedValue = 0.012
          [Stover].XoBiomass.FixedValue = 900.0
          [Stover].bBiomass.FixedValue = 180.0
      Cultivar Oats_Autumn
        Command:
          [Nodule].FixationMetabolicCost.FixedValue = 0
          [Nodule].FixationRate.FixedValue = 0
          [Phenology].CanopyExpanding.Target.FixedValue = 1546.0
          [Phenology].Senescing.Target.FixedValue = 600
          [Phenology].YieldIncreasing.Target.FixedValue = 854.0
          [Product].DryMatterContent.FixedValue = 0.87
          [Product].ExpectedYield.FixedValue = 800
          [Product].HarvestIndex.FixedValue = 0.32
          [Product].MaximumNConc.FixedValue = 0.013
          [Product].MinimumNConc.FixedValue = 0.0091
          [Root].KLModifier.XYPairs.Y = 1,1,1,1,1,1,1,0.882,0.779,0.687,0.607,0.535,0.472,0.417,0.368,0.325,0.287,0.253,0.223,0.197,0.174,0.153,0.135,0.119,0.105,0.093,0.082,0.072,0.064,0.056
          [Root].MaximumNConc.FixedValue = 0.009
          [Root].MaximumRootDepth.FixedValue = 1500
          [Root].MinimumNConc.FixedValue = 0.009
          [Root].RootProportion.FixedValue = 0.1
          [Stover].Cover.Expanding.SigCoverFunction.Xo.FixedValue = 540
          [Stover].Cover.Expanding.SigCoverFunction.Ymax.FixedValue = 0.96
          [Stover].Cover.Expanding.SigCoverFunction.b.FixedValue = 120
          [Stover].MaximumNConc.FixedValue = 0.005
          [Stover].MinimumNConc.FixedValue = 0.005
          [Stover].XoBiomass.FixedValue = 1500.0
          [Stover].bBiomass.FixedValue = 300.0
      Cultivar Oats_AutumnForage
        Command:
          [Nodule].FixationMetabolicCost.FixedValue = 0
          [Nodule].FixationRate.FixedValue = 0
          [Phenology].CanopyExpanding.Target.FixedValue = 543.0
          [Phenology].Senescing.Target.FixedValue = 600
          [Phenology].YieldIncreasing.Target.FixedValue = 1857.0
          [Product].DryMatterContent.FixedValue = 0.4
          [Product].ExpectedYield.FixedValue = 3000
          [Product].HarvestIndex.FixedValue = 0.95
          [Product].MaximumNConc.FixedValue = 0.016
          [Product].MinimumNConc.FixedValue = 0.0091
          [Root].KLModifier.XYPairs.Y = 1,1,1,1,1,1,1,0.882,0.779,0.687,0.607,0.535,0.472,0.417,0.368,0.325,0.287,0.253,0.223,0.197,0.174,0.153,0.135,0.119,0.105,0.093,0.082,0.072,0.064,0.056
          [Root].MaximumNConc.FixedValue = 0.009
          [Root].MaximumRootDepth.FixedValue = 1500
          [Root].MinimumNConc.FixedValue = 0.009
          [Root].RootProportion.FixedValue = 0.1
          [Stover].Cover.Expanding.SigCoverFunction.Xo.FixedValue = 540
          [Stover].Cover.Expanding.SigCoverFunction.Ymax.FixedValue = 0.96
          [Stover].Cover.Expanding.SigCoverFunction.b.FixedValue = 120
          [Stover].MaximumNConc.FixedValue = 0.005
          [Stover].MinimumNConc.FixedValue = 0.005
          [Stover].XoBiomass.FixedValue = 1500.0
          [Stover].bBiomass.FixedValue = 300.0
      Cultivar Oats_Spring
        Command:
          [Nodule].FixationMetabolicCost.FixedValue = 0
          [Nodule].FixationRate.FixedValue = 0
          [Phenology].CanopyExpanding.Target.FixedValue = 848.0
          [Phenology].Senescing.Target.FixedValue = 300
          [Phenology].YieldIncreasing.Target.FixedValue = 652.0
          [Product].DryMatterContent.FixedValue = 0.87
          [Product].ExpectedYield.FixedValue = 800
          [Product].HarvestIndex.FixedValue = 0.46
          [Product].MaximumNConc.FixedValue = 0.015
          [Product].MinimumNConc.FixedValue = 0.005
          [Root].KLModifier.XYPairs.Y = 1,1,1,1,1,1,1,0.807,0.651,0.526,0.424,0.343,0.276,0.223,0.18,0.145,0.117,0.095,0.076,0.062,0,0,0,0,0,0,0,0,0,0
          [Root].MaximumNConc.FixedValue = 0.009
          [Root].MaximumRootDepth.FixedValue = 1000
          [Root].MinimumNConc.FixedValue = 0.009
          [Root].RootProportion.FixedValue = 0.1
          [Stover].Cover.Expanding.SigCoverFunction.Xo.FixedValue = 540
          [Stover].Cover.Expanding.SigCoverFunction.Ymax.FixedValue = 0.96
          [Stover].Cover.Expanding.SigCoverFunction.b.FixedValue = 120
          [Stover].MaximumNConc.FixedValue = 0.005
          [Stover].MinimumNConc.FixedValue = 0.0045
          [Stover].XoBiomass.FixedValue = 900.0
          [Stover].bBiomass.FixedValue = 180.0
      Cultivar Oats_SpringForage
        Command:
          [Nodule].FixationMetabolicCost.FixedValue = 0
          [Nodule].FixationRate.FixedValue = 0
          [Phenology].CanopyExpanding.Target.FixedValue = 326.0
          [Phenology].Senescing.Target.FixedValue = 300
          [Phenology].YieldIncreasing.Target.FixedValue = 1174.0
          [Product].DryMatterContent.FixedValue = 0.4
          [Product].ExpectedYield.FixedValue = 2000
          [Product].HarvestIndex.FixedValue = 0.95
          [Product].MaximumNConc.FixedValue = 0.016
          [Product].MinimumNConc.FixedValue = 0.0091
          [Root].KLModifier.XYPairs.Y = 1,1,1,1,1,1,1,0.882,0.779,0.687,0.607,0.535,0.472,0.417,0.368,0.325,0.287,0.253,0.223,0.197,0.174,0.153,0.135,0.119,0.105,0.093,0.082,0.072,0.064,0.056
          [Root].MaximumNConc.FixedValue = 0.009
          [Root].MaximumRootDepth.FixedValue = 1500
          [Root].MinimumNConc.FixedValue = 0.009
          [Root].RootProportion.FixedValue = 0.1
          [Stover].Cover.Expanding.SigCoverFunction.Xo.FixedValue = 540
          [Stover].Cover.Expanding.SigCoverFunction.Ymax.FixedValue = 0.96
          [Stover].Cover.Expanding.SigCoverFunction.b.FixedValue = 120
          [Stover].MaximumNConc.FixedValue = 0.006
          [Stover].MinimumNConc.FixedValue = 0.005
          [Stover].XoBiomass.FixedValue = 900.0
          [Stover].bBiomass.FixedValue = 180.0
      Cultivar Onions_Autumn
        Command:
          [Nodule].FixationMetabolicCost.FixedValue = 0
          [Nodule].FixationRate.FixedValue = 0
          [Phenology].CanopyExpanding.Target.FixedValue = 899.0
          [Phenology].Senescing.Target.FixedValue = 750
          [Phenology].YieldIncreasing.Target.FixedValue = 1051.0
          [Product].DryMatterContent.FixedValue = 0.11
          [Product].ExpectedYield.FixedValue = 8000
          [Product].HarvestIndex.FixedValue = 0.8
          [Product].MaximumNConc.FixedValue = 0.014
          [Product].MinimumNConc.FixedValue = 0.0098
          [Root].KLModifier.XYPairs.Y = 1,1,1,1,1,1,1,0.223,0,0,0,0,0,0,0,0,0,0,0,0,0,0,0,0,0,0,0,0,0,0
          [Root].MaximumNConc.FixedValue = 0.01
          [Root].MaximumRootDepth.FixedValue = 400
          [Root].MinimumNConc.FixedValue = 0.01
          [Root].RootProportion.FixedValue = 0.1
          [Stover].Cover.Expanding.SigCoverFunction.Xo.FixedValue = 780
          [Stover].Cover.Expanding.SigCoverFunction.Ymax.FixedValue = 0.8
          [Stover].Cover.Expanding.SigCoverFunction.b.FixedValue = 120
          [Stover].MaximumNConc.FixedValue = 0.02
          [Stover].MinimumNConc.FixedValue = 0.02
          [Stover].XoBiomass.FixedValue = 1350.0
          [Stover].bBiomass.FixedValue = 270.0
      Cultivar Onions_Spring
        Command:
          [Nodule].FixationMetabolicCost.FixedValue = 0
          [Nodule].FixationRate.FixedValue = 0
          [Phenology].CanopyExpanding.Target.FixedValue = 733.0
          [Phenology].Senescing.Target.FixedValue = 750
          [Phenology].YieldIncreasing.Target.FixedValue = 717.0
          [Product].DryMatterContent.FixedValue = 0.11
          [Product].ExpectedYield.FixedValue = 7000
          [Product].HarvestIndex.FixedValue = 0.8
          [Product].MaximumNConc.FixedValue = 0.014
          [Product].MinimumNConc.FixedValue = 0.0098
          [Root].KLModifier.XYPairs.Y = 1,1,1,1,1,1,1,0.223,0,0,0,0,0,0,0,0,0,0,0,0,0,0,0,0,0,0,0,0,0,0
          [Root].MaximumNConc.FixedValue = 0.01
          [Root].MaximumRootDepth.FixedValue = 400
          [Root].MinimumNConc.FixedValue = 0.01
          [Root].RootProportion.FixedValue = 0.1
          [Stover].Cover.Expanding.SigCoverFunction.Xo.FixedValue = 780
          [Stover].Cover.Expanding.SigCoverFunction.Ymax.FixedValue = 0.8
          [Stover].Cover.Expanding.SigCoverFunction.b.FixedValue = 120
          [Stover].MaximumNConc.FixedValue = 0.02
          [Stover].MinimumNConc.FixedValue = 0.02
          [Stover].XoBiomass.FixedValue = 1100.0
          [Stover].bBiomass.FixedValue = 220.0
      Cultivar PakChoi_Seed
        Command:
          [Nodule].FixationMetabolicCost.FixedValue = 0
          [Nodule].FixationRate.FixedValue = 0
          [Phenology].CanopyExpanding.Target.FixedValue = 939.0
          [Phenology].Senescing.Target.FixedValue = 300
          [Phenology].YieldIncreasing.Target.FixedValue = 561.0
          [Product].DryMatterContent.FixedValue = 0.84
          [Product].ExpectedYield.FixedValue = 200
          [Product].HarvestIndex.FixedValue = 0.3
          [Product].MaximumNConc.FixedValue = 0.03
          [Product].MinimumNConc.FixedValue = 0.02
          [Root].KLModifier.XYPairs.Y = 1,1,1,1,1,1,1,0.807,0.651,0.526,0.424,0.343,0.276,0.223,0.18,0.145,0.117,0.095,0.076,0.062,0,0,0,0,0,0,0,0,0,0
          [Root].MaximumNConc.FixedValue = 0.008
          [Root].MaximumRootDepth.FixedValue = 1000
          [Root].MinimumNConc.FixedValue = 0.008
          [Root].RootProportion.FixedValue = 0.1
          [Stover].Cover.Expanding.SigCoverFunction.Xo.FixedValue = 540
          [Stover].Cover.Expanding.SigCoverFunction.Ymax.FixedValue = 0.96
          [Stover].Cover.Expanding.SigCoverFunction.b.FixedValue = 120
          [Stover].MaximumNConc.FixedValue = 0.02
          [Stover].MinimumNConc.FixedValue = 0.02
          [Stover].XoBiomass.FixedValue = 900.0
          [Stover].bBiomass.FixedValue = 180.0
      Cultivar Parsnips
        Command:
          [Nodule].FixationMetabolicCost.FixedValue = 0
          [Nodule].FixationRate.FixedValue = 0
          [Phenology].CanopyExpanding.Target.FixedValue = 489.0
          [Phenology].Senescing.Target.FixedValue = 750
          [Phenology].YieldIncreasing.Target.FixedValue = 1461.0
          [Product].DryMatterContent.FixedValue = 0.17
          [Product].ExpectedYield.FixedValue = 4400
          [Product].HarvestIndex.FixedValue = 0.95
          [Product].MaximumNConc.FixedValue = 0.014
          [Product].MinimumNConc.FixedValue = 0.0098
          [Root].KLModifier.XYPairs.Y = 1,1,1,1,1,1,1,0.472,0.223,0.105,0,0,0,0,0,0,0,0,0,0,0,0,0,0,0,0,0,0,0,0
          [Root].MaximumNConc.FixedValue = 0.01
          [Root].MaximumRootDepth.FixedValue = 500
          [Root].MinimumNConc.FixedValue = 0.01
          [Root].RootProportion.FixedValue = 0.1
          [Stover].Cover.Expanding.SigCoverFunction.Xo.FixedValue = 690
          [Stover].Cover.Expanding.SigCoverFunction.Ymax.FixedValue = 0.95
          [Stover].Cover.Expanding.SigCoverFunction.b.FixedValue = 120
          [Stover].MaximumNConc.FixedValue = 0.02
          [Stover].MinimumNConc.FixedValue = 0.02
          [Stover].XoBiomass.FixedValue = 1350.0
          [Stover].bBiomass.FixedValue = 270.0
      Cultivar Phacelia
        Command:
          [Nodule].FixationMetabolicCost.FixedValue = 0
          [Nodule].FixationRate.FixedValue = 0
          [Phenology].CanopyExpanding.Target.FixedValue = 420.0
          [Phenology].Senescing.Target.FixedValue = 0
          [Phenology].YieldIncreasing.Target.FixedValue = 1230.0
          [Product].DryMatterContent.FixedValue = 1.0
          [Product].ExpectedYield.FixedValue = 500
          [Product].HarvestIndex.FixedValue = 0.9
          [Product].MaximumNConc.FixedValue = 0.03
          [Product].MinimumNConc.FixedValue = 0.021
          [Root].KLModifier.XYPairs.Y = 1,1,1,1,1,1,1,0.687,0.472,0.325,0.223,0.153,0.105,0.072,0,0,0,0,0,0,0,0,0,0,0,0,0,0,0,0
          [Root].MaximumNConc.FixedValue = 0.01
          [Root].MaximumRootDepth.FixedValue = 700
          [Root].MinimumNConc.FixedValue = 0.01
          [Root].RootProportion.FixedValue = 0.1
          [Stover].Cover.Expanding.SigCoverFunction.Xo.FixedValue = 690
          [Stover].Cover.Expanding.SigCoverFunction.Ymax.FixedValue = 0.96
          [Stover].Cover.Expanding.SigCoverFunction.b.FixedValue = 60
          [Stover].MaximumNConc.FixedValue = 0.03
          [Stover].MinimumNConc.FixedValue = 0.03
          [Stover].XoBiomass.FixedValue = 825.0
          [Stover].bBiomass.FixedValue = 165.0
      Cultivar Plantain_Seed
        Command:
          [Nodule].FixationMetabolicCost.FixedValue = 0
          [Nodule].FixationRate.FixedValue = 0
          [Phenology].CanopyExpanding.Target.FixedValue = 2070.0
          [Phenology].Senescing.Target.FixedValue = 300
          [Phenology].YieldIncreasing.Target.FixedValue = 1361.0
          [Product].DryMatterContent.FixedValue = 0.85
          [Product].ExpectedYield.FixedValue = 200
          [Product].HarvestIndex.FixedValue = 0.15
          [Product].MaximumNConc.FixedValue = 0.03
          [Product].MinimumNConc.FixedValue = 0.0105
          [Root].KLModifier.XYPairs.Y = 1,1,1,1,1,1,1,0.807,0.651,0.526,0.424,0.343,0.276,0.223,0.18,0.145,0.117,0.095,0.076,0.062,0,0,0,0,0,0,0,0,0,0
          [Root].MaximumNConc.FixedValue = 0.01
          [Root].MaximumRootDepth.FixedValue = 1000
          [Root].MinimumNConc.FixedValue = 0.01
          [Root].RootProportion.FixedValue = 0.1
          [Stover].Cover.Expanding.SigCoverFunction.Xo.FixedValue = 690
          [Stover].Cover.Expanding.SigCoverFunction.Ymax.FixedValue = 0.95
          [Stover].Cover.Expanding.SigCoverFunction.b.FixedValue = 120
          [Stover].MaximumNConc.FixedValue = 0.012
          [Stover].MinimumNConc.FixedValue = 0.01
          [Stover].XoBiomass.FixedValue = 1866.0
          [Stover].bBiomass.FixedValue = 370.0
      Cultivar Potatoes_Long
        Command:
          [Nodule].FixationMetabolicCost.FixedValue = 0
          [Nodule].FixationRate.FixedValue = 0
          [Phenology].CanopyExpanding.Target.FixedValue = 690.0
          [Phenology].Senescing.Target.FixedValue = 600
          [Phenology].YieldIncreasing.Target.FixedValue = 1560.0
          [Product].DryMatterContent.FixedValue = 0.22
          [Product].ExpectedYield.FixedValue = 7100
          [Product].HarvestIndex.FixedValue = 0.911
          [Product].MaximumNConc.FixedValue = 0.018
          [Product].MinimumNConc.FixedValue = 0.0126
          [Root].KLModifier.XYPairs.Y = 1,1,1,1,1,1,1,0.807,0.651,0.526,0.424,0.343,0.276,0.223,0.18,0.145,0.117,0.095,0.076,0.062,0,0,0,0,0,0,0,0,0,0
          [Root].MaximumNConc.FixedValue = 0.01
          [Root].MaximumRootDepth.FixedValue = 1000
          [Root].MinimumNConc.FixedValue = 0.01
          [Root].RootProportion.FixedValue = 0.1
          [Stover].Cover.Expanding.SigCoverFunction.Xo.FixedValue = 690
          [Stover].Cover.Expanding.SigCoverFunction.Ymax.FixedValue = 0.96
          [Stover].Cover.Expanding.SigCoverFunction.b.FixedValue = 60
          [Stover].MaximumNConc.FixedValue = 0.02
          [Stover].MinimumNConc.FixedValue = 0.02
          [Stover].XoBiomass.FixedValue = 1425.0
          [Stover].bBiomass.FixedValue = 285.0
      Cultivar Potatoes_Medium
        Command:
          [Nodule].FixationMetabolicCost.FixedValue = 0
          [Nodule].FixationRate.FixedValue = 0
          [Phenology].CanopyExpanding.Target.FixedValue = 638.0
          [Phenology].Senescing.Target.FixedValue = 600
          [Phenology].YieldIncreasing.Target.FixedValue = 1312.0
          [Product].DryMatterContent.FixedValue = 0.22
          [Product].ExpectedYield.FixedValue = 6400
          [Product].HarvestIndex.FixedValue = 0.904
          [Product].MaximumNConc.FixedValue = 0.018
          [Product].MinimumNConc.FixedValue = 0.0126
          [Root].KLModifier.XYPairs.Y = 1,1,1,1,1,1,1,0.807,0.651,0.526,0.424,0.343,0.276,0.223,0.18,0.145,0.117,0.095,0.076,0.062,0,0,0,0,0,0,0,0,0,0
          [Root].MaximumNConc.FixedValue = 0.01
          [Root].MaximumRootDepth.FixedValue = 1000
          [Root].MinimumNConc.FixedValue = 0.01
          [Root].RootProportion.FixedValue = 0.1
          [Stover].Cover.Expanding.SigCoverFunction.Xo.FixedValue = 690
          [Stover].Cover.Expanding.SigCoverFunction.Ymax.FixedValue = 0.96
          [Stover].Cover.Expanding.SigCoverFunction.b.FixedValue = 60
          [Stover].MaximumNConc.FixedValue = 0.02
          [Stover].MinimumNConc.FixedValue = 0.02
          [Stover].XoBiomass.FixedValue = 1275.0
          [Stover].bBiomass.FixedValue = 255.0
      Cultivar Potatoes_Short
        Command:
          [Nodule].FixationMetabolicCost.FixedValue = 0
          [Nodule].FixationRate.FixedValue = 0
          [Phenology].CanopyExpanding.Target.FixedValue = 590.0
          [Phenology].Senescing.Target.FixedValue = 600
          [Phenology].YieldIncreasing.Target.FixedValue = 1060.0
          [Product].DryMatterContent.FixedValue = 0.23
          [Product].ExpectedYield.FixedValue = 5300
          [Product].HarvestIndex.FixedValue = 0.893
          [Product].MaximumNConc.FixedValue = 0.018
          [Product].MinimumNConc.FixedValue = 0.0126
          [Root].KLModifier.XYPairs.Y = 1,1,1,1,1,1,1,0.807,0.651,0.526,0.424,0.343,0.276,0.223,0.18,0.145,0.117,0.095,0.076,0.062,0,0,0,0,0,0,0,0,0,0
          [Root].MaximumNConc.FixedValue = 0.01
          [Root].MaximumRootDepth.FixedValue = 1000
          [Root].MinimumNConc.FixedValue = 0.01
          [Root].RootProportion.FixedValue = 0.1
          [Stover].Cover.Expanding.SigCoverFunction.Xo.FixedValue = 690
          [Stover].Cover.Expanding.SigCoverFunction.Ymax.FixedValue = 0.96
          [Stover].Cover.Expanding.SigCoverFunction.b.FixedValue = 60
          [Stover].MaximumNConc.FixedValue = 0.02
          [Stover].MinimumNConc.FixedValue = 0.02
          [Stover].XoBiomass.FixedValue = 1125.0
          [Stover].bBiomass.FixedValue = 225.0
      Cultivar Radish_Seed
        Command:
          [Nodule].FixationMetabolicCost.FixedValue = 0
          [Nodule].FixationRate.FixedValue = 0
          [Phenology].CanopyExpanding.Target.FixedValue = 1737.0
          [Phenology].Senescing.Target.FixedValue = 300
          [Phenology].YieldIncreasing.Target.FixedValue = 904.0
          [Product].DryMatterContent.FixedValue = 0.84
          [Product].ExpectedYield.FixedValue = 170
          [Product].HarvestIndex.FixedValue = 0.16
          [Product].MaximumNConc.FixedValue = 0.049
          [Product].MinimumNConc.FixedValue = 0.02
          [Root].KLModifier.XYPairs.Y = 1,1,1,1,1,1,1,0.807,0.651,0.526,0.424,0.343,0.276,0.223,0.18,0.145,0.117,0.095,0.076,0.062,0,0,0,0,0,0,0,0,0,0
          [Root].MaximumNConc.FixedValue = 0.008
          [Root].MaximumRootDepth.FixedValue = 1000
          [Root].MinimumNConc.FixedValue = 0.008
          [Root].RootProportion.FixedValue = 0.1
          [Stover].Cover.Expanding.SigCoverFunction.Xo.FixedValue = 540
          [Stover].Cover.Expanding.SigCoverFunction.Ymax.FixedValue = 0.96
          [Stover].Cover.Expanding.SigCoverFunction.b.FixedValue = 120
          [Stover].MaximumNConc.FixedValue = 0.0102
          [Stover].MinimumNConc.FixedValue = 0.006
          [Stover].XoBiomass.FixedValue = 1470.0
          [Stover].bBiomass.FixedValue = 294.0
      Cultivar Rape
        Command:
          [Nodule].FixationMetabolicCost.FixedValue = 0
          [Nodule].FixationRate.FixedValue = 0
          [Phenology].CanopyExpanding.Target.FixedValue = 999.0
          [Phenology].Senescing.Target.FixedValue = 0
          [Phenology].YieldIncreasing.Target.FixedValue = 2001.0
          [Product].DryMatterContent.FixedValue = 0.13
          [Product].ExpectedYield.FixedValue = 4615
          [Product].HarvestIndex.FixedValue = 0.8
          [Product].MaximumNConc.FixedValue = 0.037
          [Product].MinimumNConc.FixedValue = 0.02
          [Root].KLModifier.XYPairs.Y = 1,1,1,1,1,1,1,0.931,0.867,0.807,0.751,0.7,0.651,0.607,0.565,0.526,0.49,0.456,0.424,0.395,0.368,0.343,0.319,0.297,0.276,0.257,0.24,0.223,0.208,0.193
          [Root].MaximumNConc.FixedValue = 0.008
          [Root].MaximumRootDepth.FixedValue = 2400
          [Root].MinimumNConc.FixedValue = 0.008
          [Root].RootProportion.FixedValue = 0.1
          [Stover].Cover.Expanding.SigCoverFunction.Xo.FixedValue = 770
          [Stover].Cover.Expanding.SigCoverFunction.Ymax.FixedValue = 0.96
          [Stover].Cover.Expanding.SigCoverFunction.b.FixedValue = 57
          [Stover].MaximumNConc.FixedValue = 0.01
          [Stover].MinimumNConc.FixedValue = 0.01
          [Stover].XoBiomass.FixedValue = 1500.0
          [Stover].bBiomass.FixedValue = 300.0
      Cultivar Rape_Seed
        Command:
          [Nodule].FixationMetabolicCost.FixedValue = 0
          [Nodule].FixationRate.FixedValue = 0
          [Phenology].CanopyExpanding.Target.FixedValue = 1465.0
          [Phenology].Senescing.Target.FixedValue = 300
          [Phenology].YieldIncreasing.Target.FixedValue = 716.0
          [Product].DryMatterContent.FixedValue = 0.84
          [Product].ExpectedYield.FixedValue = 170
          [Product].HarvestIndex.FixedValue = 0.1
          [Product].MaximumNConc.FixedValue = 0.037
          [Product].MinimumNConc.FixedValue = 0.02
          [Root].KLModifier.XYPairs.Y = 1,1,1,1,1,1,1,0.807,0.651,0.526,0.424,0.343,0.276,0.223,0.18,0.145,0.117,0.095,0.076,0.062,0,0,0,0,0,0,0,0,0,0
          [Root].MaximumNConc.FixedValue = 0.008
          [Root].MaximumRootDepth.FixedValue = 1000
          [Root].MinimumNConc.FixedValue = 0.008
          [Root].RootProportion.FixedValue = 0.1
          [Stover].Cover.Expanding.SigCoverFunction.Xo.FixedValue = 540
          [Stover].Cover.Expanding.SigCoverFunction.Ymax.FixedValue = 0.96
          [Stover].Cover.Expanding.SigCoverFunction.b.FixedValue = 120
          [Stover].MaximumNConc.FixedValue = 0.02
          [Stover].MinimumNConc.FixedValue = 0.02
          [Stover].XoBiomass.FixedValue = 1240.0
          [Stover].bBiomass.FixedValue = 248.0
      Cultivar RyeCorn_Autumn
        Command:
          [Nodule].FixationMetabolicCost.FixedValue = 0
          [Nodule].FixationRate.FixedValue = 0
          [Phenology].CanopyExpanding.Target.FixedValue = 543.0
          [Phenology].Senescing.Target.FixedValue = 600
          [Phenology].YieldIncreasing.Target.FixedValue = 1857.0
          [Product].DryMatterContent.FixedValue = 0.4
          [Product].ExpectedYield.FixedValue = 3000
          [Product].HarvestIndex.FixedValue = 0.95
          [Product].MaximumNConc.FixedValue = 0.013
          [Product].MinimumNConc.FixedValue = 0.0091
          [Root].KLModifier.XYPairs.Y = 1,1,1,1,1,1,1,0.882,0.779,0.687,0.607,0.535,0.472,0.417,0.368,0.325,0.287,0.253,0.223,0.197,0.174,0.153,0.135,0.119,0.105,0.093,0.082,0.072,0.064,0.056
          [Root].MaximumNConc.FixedValue = 0.009
          [Root].MaximumRootDepth.FixedValue = 1500
          [Root].MinimumNConc.FixedValue = 0.009
          [Root].RootProportion.FixedValue = 0.1
          [Stover].Cover.Expanding.SigCoverFunction.Xo.FixedValue = 540
          [Stover].Cover.Expanding.SigCoverFunction.Ymax.FixedValue = 0.96
          [Stover].Cover.Expanding.SigCoverFunction.b.FixedValue = 120
          [Stover].MaximumNConc.FixedValue = 0.005
          [Stover].MinimumNConc.FixedValue = 0.005
          [Stover].XoBiomass.FixedValue = 1500.0
          [Stover].bBiomass.FixedValue = 300.0
      Cultivar RyeCorn_Spring
        Command:
          [Nodule].FixationMetabolicCost.FixedValue = 0
          [Nodule].FixationRate.FixedValue = 0
          [Phenology].CanopyExpanding.Target.FixedValue = 326.0
          [Phenology].Senescing.Target.FixedValue = 300
          [Phenology].YieldIncreasing.Target.FixedValue = 1174.0
          [Product].DryMatterContent.FixedValue = 0.4
          [Product].ExpectedYield.FixedValue = 2000
          [Product].HarvestIndex.FixedValue = 0.95
          [Product].MaximumNConc.FixedValue = 0.02
          [Product].MinimumNConc.FixedValue = 0.0091
          [Root].KLModifier.XYPairs.Y = 1,1,1,1,1,1,1,0.882,0.779,0.687,0.607,0.535,0.472,0.417,0.368,0.325,0.287,0.253,0.223,0.197,0.174,0.153,0.135,0.119,0.105,0.093,0.082,0.072,0.064,0.056
          [Root].MaximumNConc.FixedValue = 0.009
          [Root].MaximumRootDepth.FixedValue = 1500
          [Root].MinimumNConc.FixedValue = 0.009
          [Root].RootProportion.FixedValue = 0.1
          [Stover].Cover.Expanding.SigCoverFunction.Xo.FixedValue = 540
          [Stover].Cover.Expanding.SigCoverFunction.Ymax.FixedValue = 0.96
          [Stover].Cover.Expanding.SigCoverFunction.b.FixedValue = 120
          [Stover].MaximumNConc.FixedValue = 0.005
          [Stover].MinimumNConc.FixedValue = 0.005
          [Stover].XoBiomass.FixedValue = 900.0
          [Stover].bBiomass.FixedValue = 180.0
      Cultivar Ryegrass_1styear
        Command:
          [Nodule].FixationMetabolicCost.FixedValue = 0
          [Nodule].FixationRate.FixedValue = 0
          [Phenology].CanopyExpanding.Target.FixedValue = 1590.0
          [Phenology].Senescing.Target.FixedValue = 450
          [Phenology].YieldIncreasing.Target.FixedValue = 660.0
          [Product].DryMatterContent.FixedValue = 0.85
          [Product].ExpectedYield.FixedValue = 150
          [Product].HarvestIndex.FixedValue = 0.105
          [Product].MaximumNConc.FixedValue = 0.02
          [Product].MinimumNConc.FixedValue = 0.0105
          [Root].KLModifier.XYPairs.Y = 1,1,1,1,1,1,1,0.807,0.651,0.526,0.424,0.343,0.276,0.223,0.18,0.145,0.117,0.095,0.076,0.062,0,0,0,0,0,0,0,0,0,0
          [Root].MaximumNConc.FixedValue = 0.01
          [Root].MaximumRootDepth.FixedValue = 1000
          [Root].MinimumNConc.FixedValue = 0.01
          [Root].RootProportion.FixedValue = 0.1
          [Stover].Cover.Expanding.SigCoverFunction.Xo.FixedValue = 540
          [Stover].Cover.Expanding.SigCoverFunction.Ymax.FixedValue = 0.96
          [Stover].Cover.Expanding.SigCoverFunction.b.FixedValue = 120
          [Stover].MaximumNConc.FixedValue = 0.015
          [Stover].MinimumNConc.FixedValue = 0.015
          [Stover].XoBiomass.FixedValue = 1350.0
          [Stover].bBiomass.FixedValue = 270.0
      Cultivar Ryegrass_2ndyear
        Command:
          [Nodule].FixationMetabolicCost.FixedValue = 0
          [Nodule].FixationRate.FixedValue = 0
          [Phenology].CanopyExpanding.Target.FixedValue = 1237.0
          [Phenology].Senescing.Target.FixedValue = 300
          [Phenology].YieldIncreasing.Target.FixedValue = 563.0
          [Product].DryMatterContent.FixedValue = 0.85
          [Product].ExpectedYield.FixedValue = 150
          [Product].HarvestIndex.FixedValue = 0.105
          [Product].MaximumNConc.FixedValue = 0.02
          [Product].MinimumNConc.FixedValue = 0.0105
          [Root].KLModifier.XYPairs.Y = 1,1,1,1,1,1,1,0.807,0.651,0.526,0.424,0.343,0.276,0.223,0.18,0.145,0.117,0.095,0.076,0.062,0,0,0,0,0,0,0,0,0,0
          [Root].MaximumNConc.FixedValue = 0.01
          [Root].MaximumRootDepth.FixedValue = 1000
          [Root].MinimumNConc.FixedValue = 0.01
          [Root].RootProportion.FixedValue = 0.1
          [Stover].Cover.Expanding.SigCoverFunction.Xo.FixedValue = 300
          [Stover].Cover.Expanding.SigCoverFunction.Ymax.FixedValue = 0.96
          [Stover].Cover.Expanding.SigCoverFunction.b.FixedValue = 120
          [Stover].MaximumNConc.FixedValue = 0.015
          [Stover].MinimumNConc.FixedValue = 0.015
          [Stover].XoBiomass.FixedValue = 1050.0
          [Stover].bBiomass.FixedValue = 210.0
      Cultivar Spinach
        Command:
          [Nodule].FixationMetabolicCost.FixedValue = 0
          [Nodule].FixationRate.FixedValue = 0
          [Phenology].CanopyExpanding.Target.FixedValue = 1150.0
          [Phenology].Senescing.Target.FixedValue = 900
          [Phenology].YieldIncreasing.Target.FixedValue = 950.0
          [Product].DryMatterContent.FixedValue = 0.05
          [Product].ExpectedYield.FixedValue = 2200
          [Product].HarvestIndex.FixedValue = 0.7
          [Product].MaximumNConc.FixedValue = 0.03
          [Product].MinimumNConc.FixedValue = 0.021
          [Root].KLModifier.XYPairs.Y = 1,1,1,1,1,1,1,0.472,0.223,0.105,0,0,0,0,0,0,0,0,0,0,0,0,0,0,0,0,0,0,0,0
          [Root].MaximumNConc.FixedValue = 0.009
          [Root].MaximumRootDepth.FixedValue = 500
          [Root].MinimumNConc.FixedValue = 0.009
          [Root].RootProportion.FixedValue = 0.1
          [Stover].Cover.Expanding.SigCoverFunction.Xo.FixedValue = 360
          [Stover].Cover.Expanding.SigCoverFunction.Ymax.FixedValue = 0.8
          [Stover].Cover.Expanding.SigCoverFunction.b.FixedValue = 120
          [Stover].MaximumNConc.FixedValue = 0.015
          [Stover].MinimumNConc.FixedValue = 0.015
          [Stover].XoBiomass.FixedValue = 1500.0
          [Stover].bBiomass.FixedValue = 300.0
      Cultivar Spinach_Seed
        Command:
          [Nodule].FixationMetabolicCost.FixedValue = 0
          [Nodule].FixationRate.FixedValue = 0
          [Phenology].CanopyExpanding.Target.FixedValue = 1534.0
          [Phenology].Senescing.Target.FixedValue = 300
          [Phenology].YieldIncreasing.Target.FixedValue = 1107.0
          [Product].DryMatterContent.FixedValue = 0.84
          [Product].ExpectedYield.FixedValue = 300
          [Product].HarvestIndex.FixedValue = 0.3
          [Product].MaximumNConc.FixedValue = 0.037
          [Product].MinimumNConc.FixedValue = 0.02
          [Root].KLModifier.XYPairs.Y = 1,1,1,1,1,1,1,0.807,0.651,0.526,0.424,0.343,0.276,0.223,0.18,0.145,0.117,0.095,0.076,0.062,0,0,0,0,0,0,0,0,0,0
          [Root].MaximumNConc.FixedValue = 0.008
          [Root].MaximumRootDepth.FixedValue = 1000
          [Root].MinimumNConc.FixedValue = 0.008
          [Root].RootProportion.FixedValue = 0.1
          [Stover].Cover.Expanding.SigCoverFunction.Xo.FixedValue = 540
          [Stover].Cover.Expanding.SigCoverFunction.Ymax.FixedValue = 0.96
          [Stover].Cover.Expanding.SigCoverFunction.b.FixedValue = 120
          [Stover].MaximumNConc.FixedValue = 0.02
          [Stover].MinimumNConc.FixedValue = 0.02
          [Stover].XoBiomass.FixedValue = 1470.0
          [Stover].bBiomass.FixedValue = 294.0
      Cultivar SpringOnion_seed
        Command:
          [Nodule].FixationMetabolicCost.FixedValue = 0
          [Nodule].FixationRate.FixedValue = 0
          [Phenology].CanopyExpanding.Target.FixedValue = 1737.0
          [Phenology].Senescing.Target.FixedValue = 300
          [Phenology].YieldIncreasing.Target.FixedValue = 904.0
          [Product].DryMatterContent.FixedValue = 0.84
          [Product].ExpectedYield.FixedValue = 170
          [Product].HarvestIndex.FixedValue = 0.15
          [Product].MaximumNConc.FixedValue = 0.03
          [Product].MinimumNConc.FixedValue = 0.02
          [Root].KLModifier.XYPairs.Y = 1,1,1,1,1,1,1,0.807,0.651,0.526,0.424,0.343,0.276,0.223,0.18,0.145,0.117,0.095,0.076,0.062,0,0,0,0,0,0,0,0,0,0
          [Root].MaximumNConc.FixedValue = 0.008
          [Root].MaximumRootDepth.FixedValue = 1000
          [Root].MinimumNConc.FixedValue = 0.008
          [Root].RootProportion.FixedValue = 0.1
          [Stover].Cover.Expanding.SigCoverFunction.Xo.FixedValue = 540
          [Stover].Cover.Expanding.SigCoverFunction.Ymax.FixedValue = 0.96
          [Stover].Cover.Expanding.SigCoverFunction.b.FixedValue = 120
          [Stover].MaximumNConc.FixedValue = 0.02
          [Stover].MinimumNConc.FixedValue = 0.02
          [Stover].XoBiomass.FixedValue = 1470.0
          [Stover].bBiomass.FixedValue = 294.0
      Cultivar Squash
        Command:
          [Nodule].FixationMetabolicCost.FixedValue = 0
          [Nodule].FixationRate.FixedValue = 0
          [Phenology].CanopyExpanding.Target.FixedValue = 899.0
          [Phenology].Senescing.Target.FixedValue = 300
          [Phenology].YieldIncreasing.Target.FixedValue = 1501.0
          [Product].DryMatterContent.FixedValue = 0.2
          [Product].ExpectedYield.FixedValue = 2500
          [Product].HarvestIndex.FixedValue = 0.8
          [Product].MaximumNConc.FixedValue = 0.02
          [Product].MinimumNConc.FixedValue = 0.014
          [Root].KLModifier.XYPairs.Y = 1,1,1,1,1,1,1,0.472,0.223,0.105,0,0,0,0,0,0,0,0,0,0,0,0,0,0,0,0,0,0,0,0
          [Root].MaximumNConc.FixedValue = 0.01
          [Root].MaximumRootDepth.FixedValue = 500
          [Root].MinimumNConc.FixedValue = 0.01
          [Root].RootProportion.FixedValue = 0.1
          [Stover].Cover.Expanding.SigCoverFunction.Xo.FixedValue = 600
          [Stover].Cover.Expanding.SigCoverFunction.Ymax.FixedValue = 0.94
          [Stover].Cover.Expanding.SigCoverFunction.b.FixedValue = 90
          [Stover].MaximumNConc.FixedValue = 0.02
          [Stover].MinimumNConc.FixedValue = 0.02
          [Stover].XoBiomass.FixedValue = 1350.0
          [Stover].bBiomass.FixedValue = 270.0
      Cultivar Sweetcorn
        Command:
          [Nodule].FixationMetabolicCost.FixedValue = 0
          [Nodule].FixationRate.FixedValue = 0
          [Phenology].CanopyExpanding.Target.FixedValue = 794.0
          [Phenology].Senescing.Target.FixedValue = 300
          [Phenology].YieldIncreasing.Target.FixedValue = 706.0
          [Product].DryMatterContent.FixedValue = 0.55
          [Product].ExpectedYield.FixedValue = 2500
          [Product].HarvestIndex.FixedValue = 0.55
          [Product].MaximumNConc.FixedValue = 0.0165
          [Product].MinimumNConc.FixedValue = 0.0098
          [Root].KLModifier.XYPairs.Y = 1,1,1,1,1,1,1,0.807,0.651,0.526,0.424,0.343,0.276,0.223,0.18,0.145,0.117,0.095,0.076,0.062,0,0,0,0,0,0,0,0,0,0
          [Root].MaximumNConc.FixedValue = 0.007
          [Root].MaximumRootDepth.FixedValue = 1000
          [Root].MinimumNConc.FixedValue = 0.007
          [Root].RootProportion.FixedValue = 0.1
          [Stover].Cover.Expanding.SigCoverFunction.Xo.FixedValue = 540
          [Stover].Cover.Expanding.SigCoverFunction.Ymax.FixedValue = 0.75
          [Stover].Cover.Expanding.SigCoverFunction.b.FixedValue = 120
          [Stover].MaximumNConc.FixedValue = 0.009
          [Stover].MinimumNConc.FixedValue = 0.009
          [Stover].XoBiomass.FixedValue = 900.0
          [Stover].bBiomass.FixedValue = 180.0
      Cultivar Tall_Fescue
        Command:
          [Nodule].FixationMetabolicCost.FixedValue = 0
          [Nodule].FixationRate.FixedValue = 0
          [Phenology].CanopyExpanding.Target.FixedValue = 1237.0
          [Phenology].Senescing.Target.FixedValue = 300
          [Phenology].YieldIncreasing.Target.FixedValue = 563.0
          [Product].DryMatterContent.FixedValue = 0.85
          [Product].ExpectedYield.FixedValue = 200
          [Product].HarvestIndex.FixedValue = 0.105
          [Product].MaximumNConc.FixedValue = 0.02
          [Product].MinimumNConc.FixedValue = 0.0105
          [Root].KLModifier.XYPairs.Y = 1,1,1,1,1,1,1,0.807,0.651,0.526,0.424,0.343,0.276,0.223,0.18,0.145,0.117,0.095,0.076,0.062,0,0,0,0,0,0,0,0,0,0
          [Root].MaximumNConc.FixedValue = 0.01
          [Root].MaximumRootDepth.FixedValue = 1000
          [Root].MinimumNConc.FixedValue = 0.01
          [Root].RootProportion.FixedValue = 0.1
          [Stover].Cover.Expanding.SigCoverFunction.Xo.FixedValue = 300
          [Stover].Cover.Expanding.SigCoverFunction.Ymax.FixedValue = 0.96
          [Stover].Cover.Expanding.SigCoverFunction.b.FixedValue = 120
          [Stover].MaximumNConc.FixedValue = 0.018
          [Stover].MinimumNConc.FixedValue = 0.015
          [Stover].XoBiomass.FixedValue = 1050.0
          [Stover].bBiomass.FixedValue = 210.0
      Cultivar Tomato
        Command:
          [Nodule].FixationMetabolicCost.FixedValue = 0
          [Nodule].FixationRate.FixedValue = 0
          [Phenology].CanopyExpanding.Target.FixedValue = 1236.0
          [Phenology].Senescing.Target.FixedValue = 750
          [Phenology].YieldIncreasing.Target.FixedValue = 714.0
          [Product].DryMatterContent.FixedValue = 0.05
          [Product].ExpectedYield.FixedValue = 10000
          [Product].HarvestIndex.FixedValue = 0.5
          [Product].MaximumNConc.FixedValue = 0.03
          [Product].MinimumNConc.FixedValue = 0.014
          [Root].KLModifier.XYPairs.Y = 1,1,1,1,1,1,1,0.472,0.223,0.105,0,0,0,0,0,0,0,0,0,0,0,0,0,0,0,0,0,0,0,0
          [Root].MaximumNConc.FixedValue = 0.01
          [Root].MaximumRootDepth.FixedValue = 500
          [Root].MinimumNConc.FixedValue = 0.01
          [Root].RootProportion.FixedValue = 0.1
          [Stover].Cover.Expanding.SigCoverFunction.Xo.FixedValue = 690
          [Stover].Cover.Expanding.SigCoverFunction.Ymax.FixedValue = 0.96
          [Stover].Cover.Expanding.SigCoverFunction.b.FixedValue = 120
          [Stover].MaximumNConc.FixedValue = 0.02
          [Stover].MinimumNConc.FixedValue = 0.02
          [Stover].XoBiomass.FixedValue = 1350.0
          [Stover].bBiomass.FixedValue = 270.0
      Cultivar Triticalie_Autumn: same as Replacements.SCRUM.RyeCorn_Autumn
      Cultivar Triticalie_Grain
        Command:
          [Nodule].FixationMetabolicCost.FixedValue = 0
          [Nodule].FixationRate.FixedValue = 0
          [Phenology].CanopyExpanding.Target.FixedValue = 1461.0
          [Phenology].Senescing.Target.FixedValue = 600
          [Phenology].YieldIncreasing.Target.FixedValue = 939.0
          [Product].DryMatterContent.FixedValue = 0.87
          [Product].ExpectedYield.FixedValue = 1100
          [Product].HarvestIndex.FixedValue = 0.41
          [Product].MaximumNConc.FixedValue = 0.015
          [Product].MinimumNConc.FixedValue = 0.0091
          [Root].KLModifier.XYPairs.Y = 1,1,1,1,1,1,1,0.882,0.779,0.687,0.607,0.535,0.472,0.417,0.368,0.325,0.287,0.253,0.223,0.197,0.174,0.153,0.135,0.119,0.105,0.093,0.082,0.072,0.064,0.056
          [Root].MaximumNConc.FixedValue = 0.009
          [Root].MaximumRootDepth.FixedValue = 1500
          [Root].MinimumNConc.FixedValue = 0.009
          [Root].RootProportion.FixedValue = 0.1
          [Stover].Cover.Expanding.SigCoverFunction.Xo.FixedValue = 540
          [Stover].Cover.Expanding.SigCoverFunction.Ymax.FixedValue = 0.96
          [Stover].Cover.Expanding.SigCoverFunction.b.FixedValue = 120
          [Stover].MaximumNConc.FixedValue = 0.005
          [Stover].MinimumNConc.FixedValue = 0.005
          [Stover].XoBiomass.FixedValue = 1500.0
          [Stover].bBiomass.FixedValue = 300.0
      Cultivar Triticalie_Spring: same as Replacements.SCRUM.Barley_SpringForage
      Cultivar Turnip_Seed
        Command:
          [Nodule].FixationMetabolicCost.FixedValue = 0
          [Nodule].FixationRate.FixedValue = 0
          [Phenology].CanopyExpanding.Target.FixedValue = 1717.0
          [Phenology].Senescing.Target.FixedValue = 300
          [Phenology].YieldIncreasing.Target.FixedValue = 983.0
          [Product].DryMatterContent.FixedValue = 0.84
          [Product].ExpectedYield.FixedValue = 170
          [Product].HarvestIndex.FixedValue = 0.15
          [Product].MaximumNConc.FixedValue = 0.037
          [Product].MinimumNConc.FixedValue = 0.011
          [Root].KLModifier.XYPairs.Y = 1,1,1,1,1,1,1,0.882,0.779,0.687,0.607,0.535,0.472,0.417,0.368,0.325,0.287,0.253,0.223,0.197,0.174,0.153,0.135,0.119,0.105,0.093,0.082,0.072,0.064,0.056
          [Root].MaximumNConc.FixedValue = 0.008
          [Root].MaximumRootDepth.FixedValue = 1500
          [Root].MinimumNConc.FixedValue = 0.009
          [Root].RootProportion.FixedValue = 0.1
          [Stover].Cover.Expanding.SigCoverFunction.Xo.FixedValue = 540
          [Stover].Cover.Expanding.SigCoverFunction.Ymax.FixedValue = 0.96
          [Stover].Cover.Expanding.SigCoverFunction.b.FixedValue = 120
          [Stover].MaximumNConc.FixedValue = 0.01
          [Stover].MinimumNConc.FixedValue = 0.01
          [Stover].XoBiomass.FixedValue = 1500.0
          [Stover].bBiomass.FixedValue = 300.0
      Cultivar Wheat_Autumn
        Command:
          [Nodule].FixationMetabolicCost.FixedValue = 0
          [Nodule].FixationRate.FixedValue = 0
          [Phenology].CanopyExpanding.Target.FixedValue = 1461.0
          [Phenology].Senescing.Target.FixedValue = 600
          [Phenology].YieldIncreasing.Target.FixedValue = 939.0
          [Product].DryMatterContent.FixedValue = 0.87
          [Product].ExpectedYield.FixedValue = 1200
          [Product].HarvestIndex.FixedValue = 0.51
          [Product].MaximumNConc.FixedValue = 0.0205
          [Product].MinimumNConc.FixedValue = 0.01
          [Root].KLModifier.XYPairs.Y = 1,1,1,1,1,1,1,0.882,0.779,0.687,0.607,0.535,0.472,0.417,0.368,0.325,0.287,0.253,0.223,0.197,0.174,0.153,0.135,0.119,0.105,0.093,0.082,0.072,0.064,0.056
          [Root].MaximumNConc.FixedValue = 0.009
          [Root].MaximumRootDepth.FixedValue = 1500
          [Root].MinimumNConc.FixedValue = 0.009
          [Root].RootProportion.FixedValue = 0.1
          [Stover].Cover.Expanding.SigCoverFunction.Xo.FixedValue = 540
          [Stover].Cover.Expanding.SigCoverFunction.Ymax.FixedValue = 0.96
          [Stover].Cover.Expanding.SigCoverFunction.b.FixedValue = 120
          [Stover].MaximumNConc.FixedValue = 0.0069
          [Stover].MinimumNConc.FixedValue = 0.0069
          [Stover].XoBiomass.FixedValue = 1500.0
          [Stover].bBiomass.FixedValue = 300.0
      Cultivar Wheat_Spring
        Command:
          [Nodule].FixationMetabolicCost.FixedValue = 0
          [Nodule].FixationRate.FixedValue = 0
          [Phenology].CanopyExpanding.Target.FixedValue = 848.0
          [Phenology].Senescing.Target.FixedValue = 300
          [Phenology].YieldIncreasing.Target.FixedValue = 652.0
          [Product].DryMatterContent.FixedValue = 0.87
          [Product].ExpectedYield.FixedValue = 900
          [Product].HarvestIndex.FixedValue = 0.46
          [Product].MaximumNConc.FixedValue = 0.0205
          [Product].MinimumNConc.FixedValue = 0.01
          [Root].KLModifier.XYPairs.Y = 1,1,1,1,1,1,1,0.807,0.651,0.526,0.424,0.343,0.276,0.223,0.18,0.145,0.117,0.095,0.076,0.062,0,0,0,0,0,0,0,0,0,0
          [Root].MaximumNConc.FixedValue = 0.009
          [Root].MaximumRootDepth.FixedValue = 1000
          [Root].MinimumNConc.FixedValue = 0.009
          [Root].RootProportion.FixedValue = 0.1
          [Stover].Cover.Expanding.SigCoverFunction.Xo.FixedValue = 540
          [Stover].Cover.Expanding.SigCoverFunction.Ymax.FixedValue = 0.96
          [Stover].Cover.Expanding.SigCoverFunction.b.FixedValue = 120
          [Stover].MaximumNConc.FixedValue = 0.0069
          [Stover].MinimumNConc.FixedValue = 0.0069
          [Stover].XoBiomass.FixedValue = 900.0
          [Stover].bBiomass.FixedValue = 180.0
      Constant MortalityRate: FixedValue=0
  Experiment Pasture
    Memo Description
      Eaxining APSIM values for N upatkes
    Factors
      Permutation
        Factor Sowyear
          CompositeFactor 1999
            Specifications:
              [Clock].StartDate = 1999-11-15
              [Clock].EndDate = 2000-11-15
          CompositeFactor 2000
            Specifications:
              [Clock].StartDate = 2000-11-15
              [Clock].EndDate = 2001-11-15
          CompositeFactor 2001
            Specifications:
              [Clock].StartDate = 2001-11-15
              [Clock].EndDate = 2002-11-15
          CompositeFactor 2002
            Specifications:
              [Clock].StartDate = 2002-11-15
              [Clock].EndDate = 2003-11-15
          CompositeFactor 2003
            Specifications:
              [Clock].StartDate = 2003-11-15
              [Clock].EndDate = 2004-11-15
          CompositeFactor 2004
            Specifications:
              [Clock].StartDate = 2004-11-15
              [Clock].EndDate = 2005-11-15
          CompositeFactor 2005
            Specifications:
              [Clock].StartDate = 2005-11-15
              [Clock].EndDate = 2006-11-15
          CompositeFactor 2006
            Specifications:
              [Clock].StartDate = 2006-11-15
              [Clock].EndDate = 2007-11-15
          CompositeFactor 2007
            Specifications:
              [Clock].StartDate = 2007-11-15
              [Clock].EndDate = 2008-11-15
          CompositeFactor 2008
            Specifications:
              [Clock].StartDate = 2008-11-15
              [Clock].EndDate = 2009-11-15
          CompositeFactor 2009
            Specifications:
              [Clock].StartDate = 2009-11-15
              [Clock].EndDate = 2010-11-15
          CompositeFactor 2010
            Specifications:
              [Clock].StartDate = 2010-11-15
              [Clock].EndDate = 2011-11-15
          CompositeFactor 2011
            Specifications:
              [Clock].StartDate = 2011-11-15
              [Clock].EndDate = 2012-11-15
          CompositeFactor 2012
            Specifications:
              [Clock].StartDate = 2012-11-15
              [Clock].EndDate = 2013-11-15
          CompositeFactor 2013
            Specifications:
              [Clock].StartDate = 2013-11-15
              [Clock].EndDate = 2014-11-15
          CompositeFactor 2014
            Specifications:
              [Clock].StartDate = 2014-11-15
              [Clock].EndDate = 2015-11-15
          CompositeFactor 2015
            Specifications:
              [Clock].StartDate = 2015-11-15
              [Clock].EndDate = 2016-11-15
    Simulation CropCompBase
      Weather: FileName=%root%\Examples\WeatherFiles\lincoln.met
      Clock: Start=1999-04-10; End=2015-12-31
      Summary
      SoilArbitrator Soil Arbitrator
      Zone Field: Area=1; Slope=0; AspectAngle=0; Altitude=50
        MicroClimate: a_interception=0; b_interception=1; c_interception=0; d_interception=0; SoilHeatFluxFraction=0.4; MinimumHeightDiffForNewLayer=0; NightInterceptionFraction=0.5; ReferenceHeight=2
        Soil: SoilType=Generic soil; Country=New Zealand; Latitude=37.5; Longitude=172.5
          Chemical
            Thickness  NO3N  NH4N  PH
            300        0     0     6
            300        0     0     6
            300        0     0     6
            300        0     0     6
            300        0     0     6
            300        0     0     6
            200        0     0     6
          Physical
            Thickness  ParticleSizeClay  ParticleSizeSand  ParticleSizeSilt  BD  AirDry  LL15  DUL   SAT  KS
            300        20                20                60                1   0.09    0.15  0.35  0.5  500
            300        20                20                60                1   0.09    0.15  0.35  0.5  500
            300        20                20                60                1   0.09    0.15  0.35  0.5  500
            300        20                20                60                1   0.09    0.15  0.35  0.5  500
            300        20                20                60                1   0.09    0.15  0.35  0.5  500
            300        20                20                60                1   0.09    0.15  0.35  0.5  500
            200        20                20                60                1   0.09    0.15  0.35  0.5  500
            SoilCrop SPRUMSoil: LL=[0.15, 0.15, 0.15, 0.15, 0.15, 0.15, 0.15]; KL=[0.08, 0.08, 0.08, 0.08, 0.08, 0.08, 0.08]; XF=[1, 1, 1, 1, 1, 1, 1]
          WaterBalance SoilWater: SummerDate=1-Oct; SummerU=8; SummerCona=4; WinterDate=1-Apr; WinterU=4; WinterCona=1.5; DiffusConst=0; DiffusSlope=0; Salb=0.2; CN2Bare=60; CNRed=10; CNCov=0.8; DischargeWidth=0; CatchmentArea=0; Thickness=[150, 150, 300, 300, 300, 300, 300, 200]; SWCON=[0.5, 0.5, 0.43, 0.375, 0.34, 0.35, 0.4, 0.48]
          SoilNitrogen: fom_types=[default, manure, mucuna, lablab, shemp, stable]; fract_carb=[0.2, 0.3, 0.54, 0.57, 0.45, 0]; fract_cell=[0.7, 0.3, 0.37, 0.37, 0.47, 0.1]; fract_lign=[0.1, 0.4, 0.09, 0.06, 0.08, 0.9]; NPartitionApproach=0
            SoilNitrogenNO3 NO3
            SoilNitrogenNH4 NH4
            SoilNitrogenUrea Urea
          Organic: FOMCNRatio=30
            Thickness  Carbon  SoilCNRatio  FBiom  FInert  FOM
            100        2       11.5         0.025  0.3     1243.931
            200        1.8     11.5         0.025  0.4     833.832
            300        1.5     11.5         0.015  0.6     457.617
            300        1       11.5         0      1       0
            300        1       11.5         0      1       0
            300        1       11.5         0      1       0
          CERESSoilTemperature Temperature
          InitialWater Initial water: PercentMethod=0; FractionFull=1
        SurfaceOrganicMatter surface organic matter: InitialResidueName=wheat; InitialResidueType=wheat; InitialResidueMass=2000; InitialStandingFraction=0; InitialCPR=0; InitialCNR=80
        Irrigation
        Fertiliser
        Report: EventNames=[Clock].DoReport
          VariableNames:
            [Clock].Today
            [SPRUM].IsAlive
            [SPRUM].DaysAfterSowing
            [SPRUM].Phenology.CurrentPhaseName
            [SPRUM].Phenology.Stage
            [SPRUM].Product.Wt
            [Phenology].AccumulatedTT
            [SPRUM].Total.Wt
            [SPRUM].Total.N
            [SPRUM].Stover.Photosynthesis
            [SPRUM].Stover.Transpiration
            [SPRUM].Root.Depth
            [SPRUM].Stover.CoverGreen
            [SPRUM].Stover.LAI
            [SPRUM].Stover.Height
            [SPRUM].Stover.Wt
            [SPRUM].Root.NUptake
            [SPRUM].Root.Wt
            [SPRUM].Root.NUptakeLayered
            [Fertiliser].NitrogenApplied
            [Soil].SoilWater.SWmm
            [Soil].SoilNitrogen.MineralN
            [Soil].SoilNitrogen.MineralisedN
            [Soil].SoilWater.FlowNO3
            [SowAndHarvest].Script.DAS
        Plant SPRUM
        Manager AutomaticIrrigation
          Irrigation_Yes_No = yes
          Season_Start = 1-Oct
          Season_End = 30-Apr
          Season_Allocation = 1000
          Refull_Frac = 0.9
          Trigger_Frac = 0.7
          Return_days = 3
          Maximum_Irrigation_Amount = 40
          Top_Depth = 600
```csharp
using Newtonsoft.Json;
using Models.PMF.Phen;
using Models.Soils.Nutrients;
using System;
using Models.Core;
using Models.PMF;
using Models.Soils;
using System.Xml.Serialization;
using APSIM.Shared.Utilities;
using Models.PMF.Organs;
using Models.Interfaces;

        
namespace Models
{
   [Serializable] 
   [System.Xml.Serialization.XmlInclude(typeof(Model))]
    public class Script : Model
    {      
        [Link] private ISummary summary;
        [Link] private Irrigation Irrigation;
        [Link] private Clock Clock;
        [Link] private Soil Soil;
        [Link] private Plant SPRUM;
        [Link(Type = LinkType.Path, Path = "[SPRUM].Root")]
        private Root root;
        [Link(Type = LinkType.Path, Path = "[SPRUM].Phenology")]
        private Phenology phenology;
        [Link]
        private IPhysical soilPhysical;
        [Link]
        private ISoilWater waterBalance;
       //Communication to other modules
       
       //User inputs from properties tab
       [Description("Irrigation on (yes or no)")]
       public string Irrigation_Yes_No { get; set; }
       [Description("SeasonStart (dd-MMM)")]
       public string Season_Start { get; set; }
       [Description("SeasonEnd (dd-MMM)")]
       public string Season_End { get; set; }
       [Description("Season Allocation (mm)")]
       public double Season_Allocation { get; set; }
       [Description("% PAWC to refill soil to (0-1)")]
       public double Refull_Frac { get; set; }
       [Description("% PAWC to trigger irrigation (0-1)")]
       public double Trigger_Frac { get; set; }
       [Description("Minimum days for irrigation to return")]
       public double Return_days { get; set; }
       [Description("Maximum irrigation application (mm)")]
       public double Maximum_Irrigation_Amount { get; set; }
       [Description("Depth to calculate PAWC (mm)")]
       public double Top_Depth { get; set; }
       
       //Class members
       [JsonIgnore] private bool IrrigationIsAvailable { get; set; }
       [JsonIgnore] public bool SeasonIsOpen { get; set; }
       [JsonIgnore] private bool CropIsActive { get; set; }
       [JsonIgnore] private bool IrrigatorIsAvailable { get; set; }
       [JsonIgnore] private bool SoilIsDry { get; set; }
       [JsonIgnore] public double Top_DUL { get; set; }
       [JsonIgnore] public double Top_Refull { get; set; }
       [JsonIgnore] public double Top_Trigger { get; set; }
       [JsonIgnore] public double Top_LL { get; set; }
       [JsonIgnore] public double Top_SW { get; set; }
       [JsonIgnore] public double Accumulated_depth { get; set; }   
       [JsonIgnore] public double Days_since_irrigation { get; set; }
       [JsonIgnore] public double Amount_to_apply { get; set; }
       [JsonIgnore] public double Season_Application { get; set; }
        
       //Variables for date logic testing
       [JsonIgnore] public string StartString {get; set;}
       [JsonIgnore] public string EndString {get; set;}
       [JsonIgnore] public DateTime StartDate {get; set;}
       [JsonIgnore] public DateTime EndDate {get; set;}
       [JsonIgnore] public int TodayYear {get; set;}
       [JsonIgnore] public int TodayMonth {get; set;}
       [JsonIgnore] public int StartMonth {get; set;}
       [JsonIgnore] public int EndMonth {get; set;}
       [JsonIgnore] public int TodayDay {get; set;}
       [JsonIgnore] public int StartDay {get; set;}
       [JsonIgnore] public int EndDay {get; set;}
       
    
       //Calculate static soil variables
       [EventSubscribe("StartOfSimulation")]
       private void OnStartOfSimulation(object sender, EventArgs e)
       {   
          //Calculated soil water variables
          Accumulated_depth = 0;
          for (int layer = 0; Accumulated_depth < Top_Depth; layer++)
          {
             Top_LL += soilPhysical.LL15mm[layer];
             Top_DUL += soilPhysical.DULmm[layer];
             Accumulated_depth += soilPhysical.Thickness[layer];
          }
          Top_Refull = Top_LL + (Top_DUL - Top_LL) * Refull_Frac;
       }
       
      
       //Determine daily requirement for irrigation
        [EventSubscribe("StartOfDay")]
           private void OnStartOfDay(object sender, EventArgs e)
           { 
          //Can we irrigate?
          IrrigationIsAvailable = false; 
          if (Irrigation_Yes_No == "yes")
             IrrigationIsAvailable = true; 
    
          //Are we Allowed to Irrigate?
          TodayYear = Clock.Today.Year;
          StartString = Season_Start + "-" + TodayYear.ToString();
          EndString = Season_End + "-" + TodayYear.ToString();
          StartDate = DateTime.Parse(StartString);
          EndDate = DateTime.Parse(EndString);
          TodayMonth = Clock.Today.Month;
          TodayDay = Clock.Today.Day;
          StartDay = StartDate.Day;
          StartMonth = StartDate.Month;
          EndDay = EndDate.Day;
          EndMonth = EndDate.Month;
          
          SeasonIsOpen = false;
          //if we are in the spring and after the start date then yes
          if((Clock.Today.Month > 6) && (Clock.Today >= StartDate))
          SeasonIsOpen = true;
          //if we are in the autumn and before the end date then yes
          if((Clock.Today.Month <= 6) && (Clock.Today <= EndDate))
          SeasonIsOpen = true;
          
          //Is there a crop in the ground that needs irrigation?
          CropIsActive = false;
          if ((phenology.Stage >= 3.0) && (phenology.Stage < 6.0))
                CropIsActive = true;
          
          //Is the irrigator available?
          IrrigatorIsAvailable = false;
          Days_since_irrigation += 1;
          if (Days_since_irrigation >= Return_days)
             IrrigatorIsAvailable = true;
          
          //Is the soil dry enough to require irrigation?
          SoilIsDry = false;
          double CurrentRootDepth = 0;
          double RootDepth = root.Depth;
          CurrentRootDepth = Math.Max(RootDepth, CurrentRootDepth);
          
          double RelativeRootDepth = Math.Min(1.0, CurrentRootDepth / Top_Depth);
          Top_Trigger = Math.Min(Top_Refull, Top_DUL - (Top_DUL - Top_LL) * RelativeRootDepth * (1-Trigger_Frac)); 
          
          Accumulated_depth = 0;
          Top_SW = 0;
          for (int layer = 0; Accumulated_depth < Top_Depth; layer++)
          {
             Top_SW += waterBalance.SWmm[layer];
             Accumulated_depth += soilPhysical.Thickness[layer];
          }
          if (Top_SW <= Top_Trigger)
             SoilIsDry = true;
                
          //Lets bloody well irrigate then!!!!
          if((IrrigationIsAvailable) && (SeasonIsOpen) && (CropIsActive) && (IrrigatorIsAvailable) && (SoilIsDry)) //The conditions are rife for irrigation
          {
             Amount_to_apply = Math.Min(Top_Refull - Top_SW, Maximum_Irrigation_Amount);
             Amount_to_apply = Math.Min(Amount_to_apply, Season_Allocation - Season_Application); 
             Amount_to_apply = Math.Max(Amount_to_apply, 0.0);
             Irrigation.Apply(Amount_to_apply);
             Days_since_irrigation = 0;
             Season_Application += Amount_to_apply;
             summary.WriteMessage(this, "Automatic Irrigation", MessageType.Diagnostic);
            
          }
       }
    }
}
```
        Manager SowAndHarvest
          Cultivar = Pasture
          MaxRootDep = 2000
```csharp
using Newtonsoft.Json;
using System.Xml.Serialization;
using APSIM.Shared.Utilities;
using Models.PMF;
using Models.Core;
using System;
using Models.PMF.Phen;
        
namespace Models
{
    [Serializable] 
    [System.Xml.Serialization.XmlInclude(typeof(Model))]
    public class Script : Model
    {
        [Link] private Plant SPRUM;
        [Link] private Clock Clock;
        [Link] private Simulation sim;
        [Link] Zone zone;
        [Link] private Summary Summary;
        [Link(Type = LinkType.Path, Path = "[SPRUM].Phenology")]
        private Phenology phenology;
        
        [Description("Cultivar")]
        public string Cultivar { get; set; }
        [Description("Maximum Root Depth (mm)")]
        public double MaxRootDep { get; set;}
        
        [JsonIgnore] public bool Sown { get; set; }
        [JsonIgnore] public bool Harvested { get; set; }
        [JsonIgnore] public bool EndSet { get; set; }
        [JsonIgnore] public int DAS { get; set; }
        
        [EventSubscribe("StartOfSimulation")]
        private void OnSimulationCommencing(object sender, EventArgs e)
        {
            Sown = false;
            Harvested = false;
            EndSet = false;
            DAS=0;
        }
        
        [EventSubscribe("DoManagement")]
        private void OnDoManagement(object sender, EventArgs e)
        {
            if (Sown == false)
            {
                SPRUM.Sow(population: 200, cultivar: Cultivar, depth: MaxRootDep, rowSpacing: 150, budNumber: 1);
                Sown = true;
                zone.Set("[SPRUM].Root.MaximumRootDepth.FixedValue", MaxRootDep);
            }
            
            DAS+=1;

        }
    }
}
```
        Manager ApplyFertOnDates
          FertiliserType = NO3N
          FertiliserDates = 1-dec
          Amount = 0
          AmountType = False
```csharp
using APSIM.Shared.Utilities;
using Models.PMF;
using Models.Core;
using System;
namespace Models
{
    [Serializable]
    public class Script : Model
    {
        [Link] Clock Clock;
        [Link] Fertiliser Fertiliser;
        
        [Separator("A component to apply fertiliser on one or more dates on every year of the simulation")]

        [Description("Type of fertiliser to apply? ")] 
        public Fertiliser.Types FertiliserType { get; set; }

        [Description("Enter the fertilisation dates as dd-mmm with comma separation (any year information entered will be ignored): ")] 
        public string[] FertiliserDates { get; set; } 

        [Description("Amount of fertiliser to be applied (kg /ha)")] 
        public double Amount { get; set; }

        [Description("Is the above amount to be applied each time? (yes/ticked)? Or is it the total annual amount across all dates (no/unticked)")] 
        public bool AmountType { get; set; }
        
        [EventSubscribe("DoManagement")]
        private void OnDoManagement(object sender, EventArgs e)
        {
            foreach (string ddMMM in FertiliserDates)
            {
                if (DateUtilities.DatesEqual(ddMMM, Clock.Today))
                {
                    if (AmountType)
                        Fertiliser.Apply(Amount: Amount, Type: FertiliserType);
                    else
                        Fertiliser.Apply(Amount: Amount / FertiliserDates.Length, Type: FertiliserType);
                }
            }
        }
    }
}
```
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