Simulations: Version=195
  DataStore
    ExcelInput Observed: FileNames=[Observed.xlsx]; SheetNames=[Observed]
    PredictedObserved PredObs: PredictedTableName=Report; ObservedTableName=Observed; FieldNameUsedForMatch=SimulationName; FieldName2UsedForMatch=Clock.Today; AllColumns=false
  Folder Replacements
    Plant SPRUM: PlantType=SPRUM
      Memo TitlePage
        # SPRUM: the Simple Pasture Resource Uptake Model
        _Hamish Brown, Rogerio Cichota and Edith Khaembah, New Zealand Institute for Bioeconimic Science_

        The SPRUM model is built to the same principals as the SCRUM and STRUM models and can be used in similar context:

        1. It provides a model that can be quickly parameterised to represent pasture species of differing traits where a more detailed model is currently lacking.  SPRUM has been designed to be parameterised with some basic pasture information that an expert would have close to hand.
        2. For studies that are not primarily interested in the pasture and don’t want to invest a lot of time in setting the pasture components of simulations but still need something to provide sensible boundaries to the nitrogen and water balance.  The SPRUM model can be included and work sensiblly in a simulation without need to include additional manager modules to control it which helps users who are non-expert in simulating pasture management to include realistic pasture components in simulations.

        SPRUM represents key functions of pasture as follows.  Phenology is represented by two phases: a Regrowth phase where cover increases from the initial cover to the maximum cover (both specified by the user) from grazing until full canopy stages.  This is followed by a Full Canopy Phase when cover remains at the maximum value.  Radiation interception is estimated using a sigmoid function that is scaled between Start Regrowth and Full Canopy stages and between initial and maximum covers.  Different patterns of canopy recovery can be achieved by changing the the initial cover and the thermal time duration of the regrowth phase as shown in the figure below.  Further variation in the pattern of canopy cover can be achieved by changing the length of the Full Canopy phase when cover remains at the maximum value.  Potential biomass accumulation is modeled using a radiation use efficiency which the user adjusts to achieve the expected pasture growth rates.  Users may also specify the nitrogen fixation capacity of the pasture to represent different legume activities.
        ![Schematic of cover patterns achieved by changing SprumPastureInstance input fields](SPRUM_cover.jpg)

        Water stress responses may be switched on or off by the user depending on the simulation needs. When water stress is switched on it will affect crop cover and biomass accumulation.
        Nitrogen stress reduces biomass accumulation if there is insufficient N to meat minimum N concentration of growing organs. Nitrogen stress does not affect cover.
        SPRUM is not released with sets of coefficients to represent different pastures types. Instead a SprumPastureInstance model is included in a simulation where the user sets coefficients to represent the pasture required. This provides great flexibility for parameterising pastures but puts the responsibility for having sensible parameters on the model user. The name of a SprumPastureInstance is arbitrary and you may include as many as are needed to provide all the pastures for a simulation.

        The SPRUM model is built using the Plant Modelling Framework (PMF) of Brown et al., 2014 so it interfaces with other APSIM models in the same way as other plant models. SPRUM has 4 organ classes to represent different biomass components:

        1. A Simple leaf class called Leaf which represents the harvested parts of the pasture. Generally, this represents the leaf and stem components in different proportions.  SPRUM makes on consideration of the change in the composition of the "Leaf" component over time and how this would influence feed quality.  The proportion of total biomass partitioned to the leaf is 1 - RootProportion - ResidueProportion.  No senescence is modeled so leaf biomass is only reduced by BiomassRemovalEvents.
        2. A Generic organ class called residual which represents the plant parts that are not harvested and removed from the field. This could represent seed heads, stem and leaf that are not removed.  The amout of biomass partitioned to the residual and its rate of senesence is set by the user to ensure residual biomass accumulates and turns over at appropriate rates.
        3. A Root organ which extracts water and nitrogen from the soil for plant growth and returns biomass to the soil on harvest.  The user specifies the total biomass is partitioned to the root and senescence is modeled as a function of temperature so realistic patterns of root biomasss accumulation and degredateion are simulated.
        4. A Nodule organ which is only activated and fixes nitrogen for the legume crops.

        # Including SPRUM in a simulation
        Some working examples and a few parameterised SprumPastureInstances are provided in the SPRUM simulation in Examples. These are meant to provide a start point and users should carefully review these parameterisations and adapt them to best represent the pastures they want to simulate.

        To use SPRUM in a simulation you must add the SPRUM model, at least one SprumPastureInstance and a BiomassRemovalEvents. The parameters in the SprumPastureInstance are:

        - Establishment Date - the date the SprumPastureInstance will be established in the simulation.  If left blank it will be established on the first day of the simulation.

        - Age At Start of Simulation - in Years.  If the simulation is to be started with an established pasture, this parameter should be set to a value higher that the years from establishment to reach Maximum root depth.  If seedling this should be zero.  Age dimension parameters are calculated relative age between establishment and years from establishment to reach Maximum root depth.  These are used to scale pasture cover and root depth while the pasture is establishing.  Canopy will reach its maximum dimenstion 4 times faster than the roots reach their maximum depth

        - Years from planting to reach Maximum root depth - in years - thes parameter determines how long it takes the pasture to reach its maximum root depth

        - Maximum growth rate of pasture (g/MJ) - This is the radiation use efficiency of the pasture and can be altered to achieve the productivity required for the pasture in the simulations.  Typical values for this parameter are 0.5 - 2.0 g/MJ.
        - Redidue biomass proportion (0-0.5) is the proportion of total biomass partitioned to the resddue component
        - Residue senescence rate (0-1) is the proportion of residue biomass that senesses and is pased to surface organic matter (where it may decompose) each day.
        - Root Biomass proportion (0-0.5) is the proportion of total biomass that is partitioned to the roots
        - Base, optima and maximum temperatures for photosynthesis (oC) are used to set temperature response profile for radiation use efficency and subsequent biomass production.
        - Grow roots into neighbouring zone (yes or no) determines if this models roots grow into a neighbouring zone for multi zone simulations
        - Root depth (mm) is the maximum rooting depth of the pasture when it is established
        - Pasture height at and after grazing (mm)" set the height range that the pasture will grow between Start Regrowth and FullCanopy.
        - Maximum and minimum green cover (0-0.97) set the cover range that the pasture will grow between Start Regrowth and FullCanopy.
        - Extinction coefficient (0.4-1) is a parameter that describes how quickly cover increases with increased LAI. A value of 1.0 represents a prostrate leaved pasture and this decreases for pastures with more erect leaves.
        - Regrowth duration  (oCd)") is the thermal time it takes for the pasture to go from the start of regrowth to Full Canopy
        - Full Canopy duration  (oCd) is the thermal time that the pasture will spend at full canopy before "Grazing". Note that SPRUM "Grazes" its self but triggering a biomass removal event and rewinding its self to the Start Regrowth when it reaches the end of the full canopy phase.
        - Canopy expansion Temperature base, optima and maximum temperature thresholds determine how quickly the thermal time that drives canopy development is accumulated and so sets the temperature response of canopy development
        - Root Nitrogen Concentrations of leaf, residue and roots (g/g) determine how much nitrogen is required to grow these components
        - Proportion of pasture mass that is leguem (0-1) -  determines how much N fixation the SprumPastureInstance is capable of.
        - Maximum Canopy Conductance - This controls crop transpiration demand.
        - Net radiation at 50% of maximum conductance - This also controls transpiration demand and how it responds to radiation levels.
        - Does the crop respond to water stress? If checked biomass and cover accumulation will decrease if water stress occurs.

        No manager component is required for a SPRUM simulation.  It will simple establish itself on the date set in the SprumPastureInstance and graze and rewind its self each time phenology reaches the the end of the Full Canopy Phase as shown in the figure below.   The amount of biomass that is removed each grazing is specified in a BiomassRemovalEvents object.
        If greater control over grazing times is required the user should set the FullCanopy Duration to a very high number so the model does not reach the rewind stage and then include a manager which calls the BiomassRemovalEvent on the exact dates that defoliation is reqired.  It is important to ensure the Stage to Set Phenology to On Removal field on the BiomassRemovalEvent is set to StartRegrowth if grazing and rewinding from a manager is to work properly.

        ![Schematic of stages and rewinds in SPRUM](SPRUM_Stages.jpg)
      Phenology
        WeightedTemperatureFunction ThermalTime: MaximumTemperatureWeighting=0.5
          XYPairs: X=[0, 30, 40]; Y=[0, 30, 0]
        Memo Description1
          As ThermalTime accumulates the crop progresses through the following phases:
        StartPhase ReStart: Start=GrazingComplete; End=StartRegrowth; IsEmerged=true
        GenericPhase Regrowth: Start=StartRegrowth; End=FullCanopy; IsEmerged=true
          Memo Description
            This Phase goes from defoliation until Maximum cover is reached
          Constant Target: FixedValue=300; Units=<sup>o</sup>Cd
          VariableReference Progression: VariableName=[Phenology].ThermalTime
        GenericPhase FullCanopy: Start=FullCanopy; End=Grazing; IsEmerged=true
          Memo Description
            This phase goes from full cover until grazing.
          Constant Target: FixedValue=0; Units=<sup>o</sup>Cd
          VariableReference Progression: VariableName=[Phenology].ThermalTime
        GotoPhase: Start=Grazing; IsEmerged=true; PhaseNameToGoto=ReStart; RemovalType=0
        Age
      OrganArbitrator Arbitrator
        BiomassTypeArbitrator DMArbitration
          Folder PotentialPartitioningMethods
            ReallocationMethod
            AllocateFixationMethod
            RetranslocationMethod
            SendPotentialDMAllocationsMethod
          Folder AllocationMethods
            NutrientConstrainedAllocationMethod
            DryMatterAllocationsMethod
          RelativeAllocation ArbitrationMethod
        BiomassTypeArbitrator NArbitration
          Folder PotentialPartitioningMethods
            ReallocationMethod
          Folder ActualPartitioningMethods
            AllocateFixationMethod
            RetranslocationMethod
          Folder AllocationMethods
            NitrogenAllocationsMethod
          RelativeAllocation ArbitrationMethod
          AllocateUptakesMethod
        WaterUptakeMethod
        NitrogenUptakeMethod
      GenericOrgan Residue: IsAboveGround=true
        Memo Description
          It is the biomass that is removed from the crop at harvest and may include grain, root, leaf, stem, pod or any other organ type depending on the type of crop and how it is harvested.
        Constant MaximumNConc: FixedValue=0.01
        Constant MinimumNConc: FixedValue=0.005
        Constant NReallocationFactor: FixedValue=0
        Constant RemobilisationCost: FixedValue=0
        Constant SenescenceRate: FixedValue=0.01; Units=/d
        BiomassRemoval BiomassRemovalDefaults: HarvestFractionLiveToRemove=0; HarvestFractionDeadToRemove=0; HarvestFractionLiveToResidue=0.5; HarvestFractionDeadToResidue=0.5
        Constant DetachmentRateFunction: FixedValue=0.1; Units=/d
        Constant MaintenanceRespirationFunction: FixedValue=0; Units=0-1
        Constant DMConversionEfficiency: FixedValue=1; Units=0-1
        Constant NRetranslocationFactor: FixedValue=0
        Constant NitrogenDemandSwitch: FixedValue=1
        Constant DMReallocationFactor: FixedValue=0
        Constant DMRetranslocationFactor: FixedValue=0
        VariableReference CriticalNConc: VariableName=[Residue].MinimumNConc
        Constant CarbonConcentration: FixedValue=0.4
        NutrientDemandFunctions DMDemands
          MultiplyFunction Structural
            PartitionFractionDemandFunction DMDemandFunction
              Constant PartitionFraction: FixedValue=0.15
                Memo Description
                  The proportion of total biomass in harvested product
            Constant StructuralFraction: FixedValue=1; Units=0-1
          Constant Metabolic: FixedValue=0
          StorageDMDemandFunction Storage
            SubtractFunction StorageFraction
              Constant One: FixedValue=1
              VariableReference StructuralFraction: VariableName=[Residue].DMDemands.Structural.StructuralFraction
          Constant QStructuralPriority: FixedValue=1
          Constant QMetabolicPriority: FixedValue=1
          Constant QStoragePriority: FixedValue=1
        NutrientDemandFunctions NDemands
          MultiplyFunction Structural
            VariableReference MinNconc: VariableName=[Residue].minimumNconc
            VariableReference PotentialDMAllocation: VariableName=[Residue].potentialDMAllocation.Structural
          MultiplyFunction Metabolic
            SubtractFunction MetabolicNconc
              VariableReference CritNconc: VariableName=[Residue].criticalNConc
              VariableReference MinNconc: VariableName=[Residue].minimumNconc
            VariableReference PotentialDMAllocation: VariableName=[Residue].potentialDMAllocation.Structural
          StorageNDemandFunction Storage
            VariableReference NitrogenDemandSwitch: VariableName=[Residue].nitrogenDemandSwitch
            VariableReference MaxNconc: VariableName=[Residue].maximumNconc
          Constant QStructuralPriority: FixedValue=1
          Constant QMetabolicPriority: FixedValue=1
          Constant QStoragePriority: FixedValue=1
        RetranslocateNonStructural RetranslocateNitrogen
        NutrientPoolFunctions InitialWt
          Constant Structural: FixedValue=0; Units=g/m^2
          Constant Metabolic: FixedValue=0
          Constant Storage: FixedValue=0
        Constant Photosynthesis: FixedValue=0
        VariableReference initialNConcFunction: VariableName=[Residue].MaximumNConc
      SimpleLeaf Leaf: Albedo=0.18; Gsmax350=0.01; R50=150; LeafInitialisationStage=StartRegrowth; Height=0; BaseHeight=0; Width=0; FRGR=0; PotentialEP=0; WaterDemand=0; KDead=0; LAIDead=0
        Memo Description
          Stover represents any part of the crop that is not removed at harvest (i.e not part of the product).
        Constant StomatalConductanceCO2Modifier: FixedValue=1
        Constant NReallocationFactor: FixedValue=0
        Constant RemobilisationCost: FixedValue=0
        Constant SenescenceRate: FixedValue=0
        Constant InitialWt: FixedValue=0; Units=g/m^2
        Constant DetachmentRate: FixedValue=0; Units=/d
        Constant LaiDead: FixedValue=0; Units=m^2/m^2
        RUEModel Photosynthesis
          Constant RUE: FixedValue=1.2
          WeightedTemperatureFunction FT: MaximumTemperatureWeighting=0.5
            XYPairs: X=[5, 20, 25, 40]; Y=[0, 1, 1, 0]
          RUECO2Function FCO2: PhotosyntheticPathway=C3
          VariableReference RadnInt: VariableName=[Leaf].RadiationIntercepted
          Constant FVPD: FixedValue=1
          Constant FN: FixedValue=1
          LinearInterpolationFunction FW
            XYPairs: X=[0, 1]; Y=[0, 1]
            VariableReference XValue: VariableName=[Leaf].Fw
        MultiplyFunction Photosynthesis2
          MultiplyFunction Potential
            Constant g_per_oCd: FixedValue=1.1
            VariableReference Cover: VariableName=[Leaf].fRadnAllZones
            SubDailyInterpolation ThermalTime: agregationMethod=0
              Memo Description
                Progression through each of the phenological stages is driven by thermal time.  As temperature increases from zero to 30 degrees, development acelerates and then slows down again above 30 degress
              XYPairs Response: X=[5, 30, 40]; Y=[0, 25, 0]
              ThreeHourAirTemperature InterpolationMethod
          LinearInterpolationFunction WaterStressFactor
            XYPairs: X=[0, 1]; Y=[0, 1]
            VariableReference XValue: VariableName=[Leaf].Fw
        MinimumFunction FRGR
          SubDailyInterpolation FRGRFunctionTemp: agregationMethod=0
            XYPairs Response: X=[0, 10, 25, 40]; Y=[0, 1, 1, 0]
            ThreeHourAirTemperature InterpolationMethod
        AddFunction Cover
          AccumulateFunctionGeneral Regrowth: AccumulateEventName=[Clock].DoPotentialPlantGrowth; ReduceStageName=StartRegrowth; FractionRemovedOnStage=1; ReduceEventName=[SPRUM].Phenology.StageWasReset; FractionRemovedOnEvent=0; FractionRemovedOnDate=0; FractionRemovedOnCut=0; FractionRemovedOnHarvest=0; FractionRemovedOnGraze=0; FractionRemovedOnPrune=0
            MultiplyFunction Expansion
              DeltaFunction Delta: StartStageName=GrazingComplete
                MultiplyFunction Integral
                  SigmoidFunction SeasonalPattern
                    Constant Ymax: FixedValue=0.97
                    VariableReference XValue: VariableName=[Phenology].AccumulatedTT
                    Constant Xo: FixedValue=0
                    Constant b: FixedValue=50
                  VariableReference Age pattern: VariableName=[SPRUM].RelativeAnnualDimension
              LinearInterpolationFunction WaterStressFactor
                XYPairs: X=[0.3, 0.8, 1]; Y=[1, 1, 1]
                VariableReference XValue: VariableName=[Root].PlantWaterPotentialFactor
          Constant Residual: FixedValue=0.05
        Constant ExtinctionCoefficient: FixedValue=0.5
          Memo Description
            The extinction coefficient is used to calculate a LAI value (needed by MicroClimate) from the canopy cover
        VariableReference HeightFunction: VariableName=[SPRUM].Height
        Constant MaximumNConc: FixedValue=0.05
        Constant MinimumNConc: FixedValue=0.02
        BiomassRemoval BiomassRemovalDefaults: HarvestFractionLiveToRemove=1; HarvestFractionDeadToRemove=1; HarvestFractionLiveToResidue=0; HarvestFractionDeadToResidue=0
        Constant MaintenanceRespiration: FixedValue=0; Units=0-1
        Constant DMConversionEfficiency: FixedValue=1; Units=0-1
        Constant NRetranslocationFactor: FixedValue=0
        Constant DMReallocationFactor: FixedValue=0
        Constant DMRetranslocationFactor: FixedValue=0
        VariableReference CriticalNConc: VariableName=[Leaf].MinimumNConc
        Constant CarbonConcentration: FixedValue=0.4
        NutrientDemandFunctions DMDemands
          MultiplyFunction Structural
            PartitionFractionDemandFunction DMDemandFunction
              Memo Description
                DM demand is based on a simple partitioning coefficients.  At harvest the biomass partitioned to the stover = TotalDM * (1 - RootProportion) * (1 - Harvest index).  However the partitioningFraction is more complicated that this as it partitions more biomass to the stover in the CanopyExpanding Phase and less in the Yield increasing phase to give realistic patterns of accumulation of biomass in the Stover and Product over the duration of the crop
              Constant PartitionFraction: FixedValue=0.75
            Constant StructuralFraction: FixedValue=1; Units=0-1
          Constant Metabolic: FixedValue=0
          StorageDMDemandFunction Storage
            SubtractFunction StorageFraction
              Constant One: FixedValue=1
              VariableReference StructuralFraction: VariableName=[Leaf].DMDemands.Structural.StructuralFraction
          Constant QStructuralPriority: FixedValue=1
          Constant QMetabolicPriority: FixedValue=1
          Constant QStoragePriority: FixedValue=1
        NutrientDemandFunctions NDemands
          MultiplyFunction Structural
            VariableReference MinNconc: VariableName=[Leaf].minimumNconc
            VariableReference PotentialDMAllocation: VariableName=[Leaf].potentialDMAllocation.Structural
          MultiplyFunction Metabolic
            SubtractFunction MetabolicNconc
              VariableReference CritNconc: VariableName=[Leaf].criticalNConc
              VariableReference MinNconc: VariableName=[Leaf].minimumNconc
            VariableReference PotentialDMAllocation: VariableName=[Leaf].potentialDMAllocation.Structural
          StorageNDemandFunction Storage
            VariableReference NitrogenDemandSwitch: VariableName=[Leaf].nitrogenDemandSwitch
            VariableReference MaxNconc: VariableName=[Leaf].maximumNconc
          Constant QStructuralPriority: FixedValue=1
          Constant QMetabolicPriority: FixedValue=1
          Constant QStoragePriority: FixedValue=1
        Constant NitrogenDemandSwitch: FixedValue=1
      Nodule
        Memo Description
          The nodule organ is unparameterised and simply has a switch that is turned on for legume crops (so they can fix what ever N the crop demands) and switched off for non legume crops (which fix no N)
        Constant MaximumNConc: FixedValue=0
        Constant RemobilisationCost: FixedValue=0
        Constant MinimumNConc: FixedValue=0
        Constant NReallocationFactor: FixedValue=0
        Constant SenescenceRate: FixedValue=0
        MultiplyFunction FixationRate
          Constant MaximumFixation: FixedValue=0.03; Units=g N / g Photosynthesis
          VariableReference DailyPhotosynthesis: VariableName=[Leaf].Photosynthesis
          VariableReference LegumePropn: VariableName=[SPRUM].LegumePropn
        BiomassRemoval BiomassRemovalDefaults: HarvestFractionLiveToRemove=0; HarvestFractionDeadToRemove=0; HarvestFractionLiveToResidue=0; HarvestFractionDeadToResidue=0
        Constant InitialWtFunction: FixedValue=0; Units=g/m^2
        Constant DetachmentRateFunction: FixedValue=0; Units=/d
        Constant FixationMetabolicCost: FixedValue=0
        Constant MaintenanceRespirationFunction: FixedValue=0; Units=0-1
        Constant DMConversionEfficiency: FixedValue=1; Units=0-1
        Constant NRetranslocationFactor: FixedValue=0
        Constant NitrogenDemandSwitch: FixedValue=1
        Constant DMReallocationFactor: FixedValue=0
        Constant DMRetranslocationFactor: FixedValue=0
        VariableReference CriticalNConc: VariableName=[Nodule].MinimumNConc
        Constant CarbonConcentration: FixedValue=0.4
        NutrientPoolFunctions DMDemands
          MultiplyFunction Structural
            Constant DMDemandFunction: FixedValue=0; Units=g/m^2
            Constant StructuralFraction: FixedValue=1; Units=0-1
          Constant Metabolic: FixedValue=0
          StorageDMDemandFunction Storage
            SubtractFunction StorageFraction
              Constant One: FixedValue=1
              VariableReference StructuralFraction: VariableName=[Nodule].DMDemands.Structural.StructuralFraction
        NutrientPoolFunctions NDemands
          MultiplyFunction Structural
            VariableReference MinNconc: VariableName=[Nodule].minimumNconc
            VariableReference PotentialDMAllocation: VariableName=[Nodule].potentialDMAllocation.Structural
          MultiplyFunction Metabolic
            SubtractFunction MetabolicNconc
              VariableReference CritNconc: VariableName=[Nodule].criticalNConc
              VariableReference MinNconc: VariableName=[Nodule].minimumNconc
            VariableReference PotentialDMAllocation: VariableName=[Nodule].potentialDMAllocation.Structural
          StorageNDemandFunction Storage
            VariableReference NitrogenDemandSwitch: VariableName=[Nodule].nitrogenDemandSwitch
            VariableReference MaxNconc: VariableName=[Nodule].maximumNconc
      Root: GrowthRespiration=0; MaintenanceRespiration=0
        RootShapeCylinder RootShape
        Memo Description
          The root organ demands and is partitioned N and DM and its depth increases through time to provide a water uptake supply
        Constant DMConversionEfficiency: FixedValue=1; Units=0-1
        Constant RemobilisationCost: FixedValue=0
        KLModiferVsDepthFunction klModifier
          VariableReference LayerDepth: VariableName=[Physical].DepthMidPoints
          VariableReference MaximumRootDepth: VariableName=[Root].MaximumRootDepth
        Constant SoilWaterEffect: FixedValue=1
        Constant MaxDailyNUptake: FixedValue=12
        MultiplyFunction SenescenceRate
          ExponentialFunction: A=0; B=1; C=1
            DivideFunction
              SubtractFunction
                SoilTemperatureDepthFunction: Depth=100
                Constant: FixedValue=20
              Constant: FixedValue=10
          Constant Coefficient: FixedValue=0.015
        Constant MaximumNConc: FixedValue=0.009
        Constant MinimumNConc: FixedValue=0.009
        Constant NitrogenDemandSwitch: FixedValue=1
        Constant MaximumRootDepth: FixedValue=1500
        Constant RootProportion: FixedValue=0.1
          Memo Description
            This is the proportion of total biomass that is paritioned into the roots and is used to set the partitioning fraction for the roots
        BiomassRemoval BiomassRemovalDefaults: HarvestFractionLiveToRemove=0; HarvestFractionDeadToRemove=0; HarvestFractionLiveToResidue=0.2; HarvestFractionDeadToResidue=0
        Constant SpecificRootLength: FixedValue=40; Units=m/g
        LinearInterpolationFunction KNO3
          XYPairs: X=[0, 0.003]; Y=[0.02, 0.02]
          VariableReference XValue: VariableName=[Root].LengthDensity
        LinearInterpolationFunction KNH4
          XYPairs: X=[0, 0.003]; Y=[0, 0]
          VariableReference XValue: VariableName=[Root].LengthDensity
        LinearInterpolationFunction NUptakeSWFactor
          XYPairs: X=[0, 1]; Y=[0, 1]
          VariableReference XValue: VariableName=[Root].RWC
        Constant MaintenanceRespirationFunction: FixedValue=0
        Constant CarbonConcentration: FixedValue=0.4
        NutrientDemandFunctions DMDemands
          MultiplyFunction Structural
            PartitionFractionDemandFunction DMDemandFunction
              Constant PartitionFraction: FixedValue=0.1
            Constant StructuralFraction: FixedValue=1
          Constant Metabolic: FixedValue=0
          StorageDMDemandFunction Storage
            SubtractFunction StorageFraction
              Constant One: FixedValue=1
              VariableReference StructuralFraction: VariableName=[Root].DMDemands.Structural.StructuralFraction
          Constant QStructuralPriority: FixedValue=1
          Constant QMetabolicPriority: FixedValue=1
          Constant QStoragePriority: FixedValue=1
        NutrientDemandFunctions NDemands
          MultiplyFunction Structural
            VariableReference MinNconc: VariableName=[Root].minimumNconc
            VariableReference PotentialDMAllocation: VariableName=[Root].potentialDMAllocation.Structural
          MultiplyFunction Metabolic
            SubtractFunction MetabolicNconc
              VariableReference CritNconc: VariableName=[Root].criticalNConc
              VariableReference MinNconc: VariableName=[Root].minimumNconc
            VariableReference PotentialDMAllocation: VariableName=[Root].potentialDMAllocation.Structural
          StorageNDemandFunction Storage
            VariableReference NitrogenDemandSwitch: VariableName=[Root].nitrogenDemandSwitch
            VariableReference MaxNconc: VariableName=[Root].maximumNconc
          Constant QStructuralPriority: FixedValue=1
          Constant QMetabolicPriority: FixedValue=1
          Constant QStoragePriority: FixedValue=1
        VariableReference CriticalNConc: VariableName=[Root].MinimumNConc
        NutrientPoolFunctions InitialWt
          Constant Structural: FixedValue=0.2; Units=g/plant
          Constant Metabolic: FixedValue=0
          Constant Storage: FixedValue=0
        Constant RootDepthStressFactor: FixedValue=1
        DivideFunction RootFrontVelocity
          VariableReference MaxRootDepth: VariableName=[Root].MaximumRootDepth
          MultiplyFunction RootGrowthDuration
            Constant YearsToMaxDepth: FixedValue=0; Units=years
              Memo Param value set at establishment
                STRUM calculates this parameter value during run-time when the crop is established from parameter values set in the relevent STRUMtree object
            Constant DaysInAYear: FixedValue=365
      CompositeBiomass Total: OrganNames=[Leaf, Residue, Root]; IncludeLive=true; IncludeDead=true
      CompositeBiomass AboveGround: OrganNames=[Leaf, Residue]; IncludeLive=true; IncludeDead=true
        Memo
          The AboveGround composite biomass object includes Stover and Product organs.
      Constant MortalityRate: FixedValue=0
      Constant LegumePropn: FixedValue=1
      Constant SeedMortalityRate: FixedValue=0
      LinearInterpolationFunction RelativeAnnualDimension
        XYPairs: X=[0, 6]; Y=[0.4, 1]
        VariableReference XValue: VariableName=[Phenology].Age.YearDecimal
      MultiplyFunction Height
        AddFunction SeasonalPattern
          MultiplyFunction HightOfRegrowth
            Constant MaxHeightFromRegrowth: FixedValue=0
            LinearInterpolationFunction RegrowthPattern
              XYPairs: X=[2, 3, 4]; Y=[0, 0.75, 1]
              VariableReference XValue: VariableName=[Phenology].Stage
          Constant PostGrazeHeight: FixedValue=0
        VariableReference AgePattern: VariableName=[SPRUM].RelativeAnnualDimension
      LinearInterpolationFunction WaterStressFactor
        XYPairs: X=[0, 1]; Y=[0, 1]
        VariableReference XValue: VariableName=[Leaf].Fw
  Experiment PotentialYieldTest
    Memo Description
      Eaxining APSIM values for N upatkes
    Factors
      Permutation
        Factor PotentialYield
          CompositeFactor Low: Specifications=[BasePasture].RUE = 0.5
          CompositeFactor Mid: Specifications=[BasePasture].RUE = 0.75
          CompositeFactor High: Specifications=[BasePasture].RUE = 1.0
        Factor NReplacement
          CompositeFactor 100kgN: Specifications=[ApplyFertOnDates].Script.Amount = 100
          CompositeFactor 300kgN: Specifications=[ApplyFertOnDates].Script.Amount = 300
          CompositeFactor 600kgN: Specifications=[ApplyFertOnDates].Script.Amount = 600
    Simulation CropCompBase
      Weather: FileName=%root%/Examples/WeatherFiles/NZ_Lincoln
      Clock: Start=1999-08-01; End=2000-08-01
      Summary
      SoilArbitrator Soil Arbitrator
      Zone Field: Area=1; Slope=0; AspectAngle=0; Altitude=50
        MicroClimate: a_interception=0; b_interception=1; c_interception=0; d_interception=0; SoilHeatFluxFraction=0.4; MinimumHeightDiffForNewLayer=0; NightInterceptionFraction=0.5; ReferenceHeight=2
        Soil: SoilType=Generic soil; Country=New Zealand; Latitude=37.5; Longitude=172.5
          Chemical: Thickness=[300, 300, 300, 300, 300, 300, 200]; PH=[6, 6, 6, 6, 6, 6, 6]; PHUnits=Water
          Physical
            Thickness  ParticleSizeSand  ParticleSizeSilt  ParticleSizeClay  BD  AirDry  LL15  DUL   SAT  KS
            300        20                60                20                1   0.09    0.15  0.35  0.5  500
            300        20                60                20                1   0.09    0.15  0.35  0.5  500
            300        20                60                20                1   0.09    0.15  0.35  0.5  500
            300        20                60                20                1   0.09    0.15  0.35  0.5  500
            300        20                60                20                1   0.09    0.15  0.35  0.5  500
            300        20                60                20                1   0.09    0.15  0.35  0.5  500
            200        20                60                20                1   0.09    0.15  0.35  0.5  500
            SoilCrop SPRUMSoil: LL=[0.15, 0.15, 0.15, 0.15, 0.15, 0.15, 0.15]; KL=[0.08, 0.08, 0.08, 0.08, 0.08, 0.08, 0.08]; XF=[1, 1, 1, 1, 1, 1, 1]
          WaterBalance SoilWater: SummerDate=1-Oct; SummerU=8; SummerCona=4; WinterDate=1-Apr; WinterU=4; WinterCona=1.5; DiffusConst=0; DiffusSlope=0; Salb=0.2; CN2Bare=60; CNRed=10; CNCov=0.8; DischargeWidth=0; CatchmentArea=0; PSIDul=-100; Thickness=[150, 150, 300, 300, 300, 300, 300, 200]; SWCON=[0.5, 0.5, 0.43, 0.375, 0.34, 0.35, 0.4, 0.48]
          Nutrient
          Organic: FOMCNRatio=30; CarbonUnits=Total
            Thickness  Carbon  SoilCNRatio  FBiom  FInert  FOM
            100        2       11.5         0.025  0.3     1243.931
            200        1.8     11.5         0.025  0.4     833.832
            300        1.5     11.5         0.015  0.6     457.617
            300        1       11.5         0      1       0
            300        1       11.5         0      1       0
            300        1       11.5         0      1       0
          Water: Thickness=[300, 300, 300, 300, 300, 300, 200]; InitialValues=[0.35, 0.35, 0.35, 0.35, 0.35, 0.35, 0.35]; InitialPAWmm=400; RelativeTo=LL15; FilledFromTop=true
          Solute NO3: Thickness=[300, 300, 300, 300, 300, 300, 200]; InitialValues=[0, 0, 0, 0, 0, 0, 0]; InitialValuesUnits=ppm; WaterTableConcentration=0; D0=0; DepthConstant=0; MaxDepthSoluteAccessible=0; RunoffEffectivenessAtMovingSolute=0; MaxEffectiveRunoff=0
          Solute NH4: same as PotentialYieldTest.CropCompBase.Field.Soil.NO3
          Solute Urea: Thickness=[300, 300, 300, 300, 300, 300, 200]; InitialValues=[0, 0, 0, 0, 0, 0, 0]; InitialValuesUnits=kg/ha; WaterTableConcentration=0; D0=0; DepthConstant=0; MaxDepthSoluteAccessible=0; RunoffEffectivenessAtMovingSolute=0; MaxEffectiveRunoff=0
          SoilTemperature Temperature
        SurfaceOrganicMatter surface organic matter: InitialResidueName=wheat; InitialResidueType=wheat; InitialResidueMass=2000; InitialStandingFraction=0; InitialCPR=0; InitialCNR=80
        Irrigation
        Fertiliser
        Report: EventNames=[Clock].DoReport
          VariableNames:
            [Clock].Today
            [SPRUM].IsAlive
            [SPRUM].DaysAfterSowing
            [SPRUM].Phenology.CurrentPhaseName
            [SPRUM].Phenology.Stage
            [SPRUM].Residue.Wt
            [Phenology].AccumulatedTT
            [SPRUM].Total.Wt
            [SPRUM].Total.N
            [SPRUM].Leaf.Photosynthesis
            [SPRUM].Leaf.Transpiration
            [SPRUM].Root.Depth
            [SPRUM].Leaf.CoverGreen
            [SPRUM].Leaf.LAI
            [SPRUM].Height
            [SPRUM].Leaf.Wt
            [SPRUM].Root.NUptake
            [SPRUM].Root.Wt
            [SPRUM].Root.NUptakeLayered
            [Fertiliser].NitrogenApplied
            [Soil].Water.MM
            [Soil].Nutrient.MineralN
            [Soil].Nutrient.MineralisedN
            [NO3].Flow
            [SowAndHarvest].Script.DAS
        Plant SPRUM
        Manager AutomaticIrrigation
          Irrigation_Yes_No = yes
          Season_Start = 1-Oct
          Season_End = 30-Apr
          Season_Allocation = 1000
          Refull_Frac = 0.9
          Trigger_Frac = 0.7
          Return_days = 3
          Maximum_Irrigation_Amount = 40
          Top_Depth = 600
```csharp
using Newtonsoft.Json;
using Models.PMF.Phen;
using Models.Soils.Nutrients;
using System;
using Models.Core;
using Models.PMF;
using Models.Soils;
using System.Xml.Serialization;
using APSIM.Shared.Utilities;
using Models.PMF.Organs;
using Models.Interfaces;

        
namespace Models
{
   [Serializable] 
   [System.Xml.Serialization.XmlInclude(typeof(Model))]
    public class Script : Model
    {      
        [Link] private ISummary summary;
        [Link] private Irrigation Irrigation;
        [Link] private Clock Clock;
        [Link] private Soil Soil;
        [Link] private Plant SPRUM;
        [Link(Type = LinkType.Path, Path = "[SPRUM].Root")]
        private Root root;
        [Link(Type = LinkType.Path, Path = "[SPRUM].Phenology")]
        private Phenology phenology;
        [Link]
        private IPhysical soilPhysical;
        [Link]
        private ISoilWater waterBalance;
       //Communication to other modules
       
       //User inputs from properties tab
       [Description("Irrigation on (yes or no)")]
       public string Irrigation_Yes_No { get; set; }
       [Description("SeasonStart (dd-MMM)")]
       public string Season_Start { get; set; }
       [Description("SeasonEnd (dd-MMM)")]
       public string Season_End { get; set; }
       [Description("Season Allocation (mm)")]
       public double Season_Allocation { get; set; }
       [Description("% PAWC to refill soil to (0-1)")]
       public double Refull_Frac { get; set; }
       [Description("% PAWC to trigger irrigation (0-1)")]
       public double Trigger_Frac { get; set; }
       [Description("Minimum days for irrigation to return")]
       public double Return_days { get; set; }
       [Description("Maximum irrigation application (mm)")]
       public double Maximum_Irrigation_Amount { get; set; }
       [Description("Depth to calculate PAWC (mm)")]
       public double Top_Depth { get; set; }
       
       //Class members
       [JsonIgnore] private bool IrrigationIsAvailable { get; set; }
       [JsonIgnore] public bool SeasonIsOpen { get; set; }
       [JsonIgnore] private bool CropIsActive { get; set; }
       [JsonIgnore] private bool IrrigatorIsAvailable { get; set; }
       [JsonIgnore] private bool SoilIsDry { get; set; }
       [JsonIgnore] public double Top_DUL { get; set; }
       [JsonIgnore] public double Top_Refull { get; set; }
       [JsonIgnore] public double Top_Trigger { get; set; }
       [JsonIgnore] public double Top_LL { get; set; }
       [JsonIgnore] public double Top_SW { get; set; }
       [JsonIgnore] public double Accumulated_depth { get; set; }   
       [JsonIgnore] public double Days_since_irrigation { get; set; }
       [JsonIgnore] public double Amount_to_apply { get; set; }
       [JsonIgnore] public double Season_Application { get; set; }
        
       //Variables for date logic testing
       [JsonIgnore] public string StartString {get; set;}
       [JsonIgnore] public string EndString {get; set;}
       [JsonIgnore] public DateTime StartDate {get; set;}
       [JsonIgnore] public DateTime EndDate {get; set;}
       [JsonIgnore] public int TodayYear {get; set;}
       [JsonIgnore] public int TodayMonth {get; set;}
       [JsonIgnore] public int StartMonth {get; set;}
       [JsonIgnore] public int EndMonth {get; set;}
       [JsonIgnore] public int TodayDay {get; set;}
       [JsonIgnore] public int StartDay {get; set;}
       [JsonIgnore] public int EndDay {get; set;}
       
    
       //Calculate static soil variables
       [EventSubscribe("StartOfSimulation")]
       private void OnStartOfSimulation(object sender, EventArgs e)
       {   
          //Calculated soil water variables
          Accumulated_depth = 0;
          for (int layer = 0; Accumulated_depth < Top_Depth; layer++)
          {
             Top_LL += soilPhysical.LL15mm[layer];
             Top_DUL += soilPhysical.DULmm[layer];
             Accumulated_depth += soilPhysical.Thickness[layer];
          }
          Top_Refull = Top_LL + (Top_DUL - Top_LL) * Refull_Frac;
       }
       
      
       //Determine daily requirement for irrigation
        [EventSubscribe("StartOfDay")]
           private void OnStartOfDay(object sender, EventArgs e)
           { 
          //Can we irrigate?
          IrrigationIsAvailable = false; 
          if (Irrigation_Yes_No == "yes")
             IrrigationIsAvailable = true; 
    
          //Are we Allowed to Irrigate?
          TodayYear = Clock.Today.Year;
          StartString = Season_Start + "-" + TodayYear.ToString();
          EndString = Season_End + "-" + TodayYear.ToString();
          StartDate = DateTime.Parse(StartString);
          EndDate = DateTime.Parse(EndString);
          TodayMonth = Clock.Today.Month;
          TodayDay = Clock.Today.Day;
          StartDay = StartDate.Day;
          StartMonth = StartDate.Month;
          EndDay = EndDate.Day;
          EndMonth = EndDate.Month;
          
          SeasonIsOpen = false;
          //if we are in the spring and after the start date then yes
          if((Clock.Today.Month > 6) && (Clock.Today >= StartDate))
          SeasonIsOpen = true;
          //if we are in the autumn and before the end date then yes
          if((Clock.Today.Month <= 6) && (Clock.Today <= EndDate))
          SeasonIsOpen = true;
          
          //Is there a crop in the ground that needs irrigation?
          CropIsActive = false;
          if ((phenology.Stage >= 3.0) && (phenology.Stage < 6.0))
                CropIsActive = true;
          
          //Is the irrigator available?
          IrrigatorIsAvailable = false;
          Days_since_irrigation += 1;
          if (Days_since_irrigation >= Return_days)
             IrrigatorIsAvailable = true;
          
          //Is the soil dry enough to require irrigation?
          SoilIsDry = false;
          double CurrentRootDepth = 0;
          double RootDepth = root.Depth;
          CurrentRootDepth = Math.Max(RootDepth, CurrentRootDepth);
          
          double RelativeRootDepth = Math.Min(1.0, CurrentRootDepth / Top_Depth);
          Top_Trigger = Math.Min(Top_Refull, Top_DUL - (Top_DUL - Top_LL) * RelativeRootDepth * (1-Trigger_Frac)); 
          
          Accumulated_depth = 0;
          Top_SW = 0;
          for (int layer = 0; Accumulated_depth < Top_Depth; layer++)
          {
             Top_SW += waterBalance.SWmm[layer];
             Accumulated_depth += soilPhysical.Thickness[layer];
          }
          if (Top_SW <= Top_Trigger)
             SoilIsDry = true;
                
          //Lets bloody well irrigate then!!!!
          if((IrrigationIsAvailable) && (SeasonIsOpen) && (CropIsActive) && (IrrigatorIsAvailable) && (SoilIsDry)) //The conditions are rife for irrigation
          {
             Amount_to_apply = Math.Min(Top_Refull - Top_SW, Maximum_Irrigation_Amount);
             Amount_to_apply = Math.Min(Amount_to_apply, Season_Allocation - Season_Application); 
             Amount_to_apply = Math.Max(Amount_to_apply, 0.0);
             Irrigation.Apply(Amount_to_apply);
             Days_since_irrigation = 0;
             Season_Application += Amount_to_apply;
             summary.WriteMessage(this, "Automatic Irrigation", MessageType.Diagnostic);
            
          }
       }
    }
}
```
        Manager SowAndHarvest
```csharp
using Models.Soils;
using Models.PMF.Phen;
using System;
using Models.Core;
using Models.PMF;
using APSIM.Shared.Utilities;
using System.Xml.Serialization;
using Newtonsoft.Json;
        
namespace Models
{
    [Serializable] 
    [System.Xml.Serialization.XmlInclude(typeof(Model))]
    public class Script : Model
    {
        [JsonIgnore] public int DAS { get; set; }
        [EventSubscribe("StartOfSimulation")]
        private void OnSimulationCommencing(object sender, EventArgs e)
        {
            DAS=0;
        }
        
        [EventSubscribe("DoManagement")]
        private void OnDoManagement(object sender, EventArgs e)
        {
            DAS+=1;
        }
    }
}
```
        Manager ApplyFertOnDates
          FertiliserType = NO3N
          FertiliserDates = 1-Aug, 15-Aug, 1-Sep, 15-Sep, 1-Nov, 15-Nov, 1-dec, 15-dec, 1-Jan, 15-Jan, 1-Feb, 15-Feb, 1-Mar, 15-Mar
          Amount = 0
          AmountType = False
```csharp
using Models.Soils;
using System;
using Models.Core;
using Models.PMF;
using APSIM.Shared.Utilities;
namespace Models
{
    [Serializable]
    public class Script : Model
    {
        [Link] Clock Clock;
        [Link] Fertiliser Fertiliser;
        
        [Separator("A component to apply fertiliser on one or more dates on every year of the simulation")]

        [Description("Type of fertiliser to apply? ")] 
        [Display(Type = DisplayType.FertiliserType)]public string FertiliserType { get; set; }

        [Description("Enter the fertilisation dates as dd-mmm with comma separation (any year information entered will be ignored): ")] 
        public string[] FertiliserDates { get; set; } 

        [Description("Amount of fertiliser to be applied (kg /ha)")] 
        public double Amount { get; set; }

        [Description("Is the above amount to be applied each time? (yes/ticked)? Or is it the total annual amount across all dates (no/unticked)")] 
        public bool AmountType { get; set; }
        
        [EventSubscribe("DoManagement")]
        private void OnDoManagement(object sender, EventArgs e)
        {
            foreach (string ddMMM in FertiliserDates)
            {
                if (DateUtilities.DatesEqual(ddMMM, Clock.Today))
                {
                    if (AmountType)
                        Fertiliser.Apply(amount: Amount, type: FertiliserType);
                    else
                        Fertiliser.Apply(amount: Amount / FertiliserDates.Length, type: FertiliserType);
                }
            }
        }
    }
}
```
        SprumPastureInstance BasePasture: AgeAtSimulationStart=1; YearsToMaxDimension=1; RUE=1; Presidue=0.15; RsenRate=0.01; Proot=0.1; PSBaseT=5; PSLOptT=20; PSUOptT=25; PSMaxT=35; GRINZ=false; MaxRD=600; MaxHeight=300; MaxPrunedHeight=100; MaxCover=0.97; MinCover=0.5; ExtinctCoeff=0.7; RegrowthDuration=300; FullCanopyDuration=0; BaseT=5; OptT=25; MaxT=35; RootNConc=0.01; LeafNConc=0.05; ResidueNConc=0.01; LegumePropn=0; GSMax=0.006; R50=120; WaterStress=false
        BiomassRemovalEvents OnCut: NameOfPlantToRemoveFrom=SPRUM; RemovalType=0
          BiomassRemovalFractions:
            PlantName  OrganName  TypeString  LiveToRemove  DeadToRemove  LiveToResidue  DeadToResidue
            SPRUM      Residue    Cutting     0             0             0.5            0.5
            SPRUM      Leaf       Cutting     1             1             0              0
            SPRUM      Nodule     Cutting     0             0             0              0
            SPRUM      Root       Cutting     0             0             0              0
  Experiment NFixationTest
    Memo Description
      Eaxining APSIM values for N upatkes
    Factors
      Permutation
        Factor PotentialYield: same as PotentialYieldTest.Factors.Permutation.PotentialYield
        Factor Legume
          CompositeFactor Legume: Specifications=[BasePasture].LegumePropn = 1.0
          CompositeFactor Mix: Specifications=[BasePasture].LegumePropn = 0.2
          CompositeFactor Grass: Specifications=[BasePasture].LegumePropn = 0.0
    Simulation LegCompBase
      Weather: FileName=%root%/Examples/WeatherFiles/NZ_Lincoln
      Clock: Start=1999-08-01; End=2000-08-01
      Summary
      SoilArbitrator Soil Arbitrator
      Zone Field: Area=1; Slope=0; AspectAngle=0; Altitude=50
        MicroClimate: a_interception=0; b_interception=1; c_interception=0; d_interception=0; SoilHeatFluxFraction=0.4; MinimumHeightDiffForNewLayer=0; NightInterceptionFraction=0.5; ReferenceHeight=2
        Soil: same as PotentialYieldTest.CropCompBase.Field.Soil
        SurfaceOrganicMatter surface organic matter: InitialResidueName=wheat; InitialResidueType=wheat; InitialResidueMass=2000; InitialStandingFraction=0; InitialCPR=0; InitialCNR=80
        Irrigation
        Fertiliser
        Report: EventNames=[Clock].DoReport
          VariableNames:
            [Clock].Today
            [SPRUM].IsAlive
            [SPRUM].DaysAfterSowing
            [SPRUM].Phenology.CurrentPhaseName
            [SPRUM].Phenology.Stage
            [SPRUM].Phenology.Age.YearDecimal
            [SPRUM].Residue.Wt
            [Phenology].AccumulatedTT
            [SPRUM].Total.Wt
            [SPRUM].Total.N
            [SPRUM].Leaf.Photosynthesis
            [SPRUM].Leaf.Transpiration
            [SPRUM].Root.Depth
            [SPRUM].Leaf.CoverGreen
            [SPRUM].Leaf.LAI
            [SPRUM].Height
            [SPRUM].Leaf.Wt
            [SPRUM].Root.NUptake
            [SPRUM].Root.Wt
            [SPRUM].Root.NUptakeLayered
            [Fertiliser].NitrogenApplied
            [Soil].Water.MM
            [Soil].Nutrient.MineralN
            [Soil].Nutrient.MineralisedN
            [NO3].Flow
            [SowAndHarvest].Script.DAS
        Plant SPRUM
        Manager AutomaticIrrigation: same as PotentialYieldTest.CropCompBase.Field.AutomaticIrrigation
        Manager SowAndHarvest
          script: same as in PotentialYieldTest.CropCompBase.Field.SowAndHarvest
        Manager ApplyFertOnDates: same as PotentialYieldTest.CropCompBase.Field.ApplyFertOnDates
        SprumPastureInstance BasePasture: AgeAtSimulationStart=1; YearsToMaxDimension=1; RUE=0; Presidue=0.15; RsenRate=0.01; Proot=0.2; PSBaseT=5; PSLOptT=20; PSUOptT=25; PSMaxT=35; GRINZ=false; MaxRD=600; MaxHeight=300; MaxPrunedHeight=100; MaxCover=0.95; MinCover=0.5; ExtinctCoeff=0.5; RegrowthDuration=300; FullCanopyDuration=0; BaseT=5; OptT=25; MaxT=35; RootNConc=0.01; LeafNConc=0.05; ResidueNConc=0.01; LegumePropn=0; GSMax=0.006; R50=120; WaterStress=false
        BiomassRemovalEvents OnCut: NameOfPlantToRemoveFrom=SPRUM; RemovalType=0
          BiomassRemovalFractions:
            PlantName  OrganName  TypeString  LiveToRemove  DeadToRemove  LiveToResidue  DeadToResidue
            SPRUM      Residue    Cutting     0             0             0.5            0.5
            SPRUM      Leaf       Cutting     1             1             0              0
            SPRUM      Nodule     Cutting     0             0             0              0
            SPRUM      Root       Cutting     0             0             0.25           0.25
  Experiment RegrowthTest
    Memo Description
      Eaxining APSIM values for N upatkes
    Factors
      Permutation
        Factor Duration
          CompositeFactor Fast: Specifications=[BasePasture].RegrowthDuration = 150
          CompositeFactor Mid: Specifications=[BasePasture].RegrowthDuration = 300
          CompositeFactor Long: Specifications=[BasePasture].RegrowthDuration = 450
        Factor ResidualCover
          CompositeFactor Low: Specifications=[BasePasture].MinCover = 0.1
          CompositeFactor Mid: Specifications=[BasePasture].MinCover = 0.5
          CompositeFactor High: Specifications=[BasePasture].MinCover = 0.9
    Simulation RegrowthBase
      Weather: FileName=%root%/Examples/WeatherFiles/NZ_Lincoln
      Clock: Start=1999-08-01; End=2000-08-01
      Summary
      SoilArbitrator Soil Arbitrator
      Zone Field: Area=1; Slope=0; AspectAngle=0; Altitude=50
        MicroClimate: a_interception=0; b_interception=1; c_interception=0; d_interception=0; SoilHeatFluxFraction=0.4; MinimumHeightDiffForNewLayer=0; NightInterceptionFraction=0.5; ReferenceHeight=2
        Soil: same as PotentialYieldTest.CropCompBase.Field.Soil
        SurfaceOrganicMatter surface organic matter: InitialResidueName=wheat; InitialResidueType=wheat; InitialResidueMass=2000; InitialStandingFraction=0; InitialCPR=0; InitialCNR=80
        Irrigation
        Fertiliser
        Report: EventNames=[Clock].DoReport
          VariableNames:
            [Clock].Today
            [SPRUM].IsAlive
            [SPRUM].DaysAfterSowing
            [SPRUM].Phenology.CurrentPhaseName
            [SPRUM].Phenology.Stage
            [SPRUM].Residue.Wt
            [Phenology].AccumulatedTT
            [SPRUM].Total.Wt
            [SPRUM].Total.N
            [SPRUM].Leaf.Photosynthesis
            [SPRUM].Leaf.Transpiration
            [SPRUM].Root.Depth
            [SPRUM].Leaf.CoverGreen
            [SPRUM].Leaf.LAI
            [SPRUM].Height
            [SPRUM].Leaf.Wt
            [SPRUM].Root.NUptake
            [SPRUM].Root.Wt
            [SPRUM].Root.NUptakeLayered
            [Fertiliser].NitrogenApplied
            [Soil].Water.MM
            [Soil].Nutrient.MineralN
            [Soil].Nutrient.MineralisedN
            [NO3].Flow
            [SowAndHarvest].Script.DAS
            [SPRUM].Phenology.AccumulatedTT
            [SPRUM].Arbitrator.FN
            [SPRUM].Leaf.Cover.Regrowth.Expansion.Delta
        Plant SPRUM
        Manager AutomaticIrrigation
          Irrigation_Yes_No = yes
          Season_Start = 1-Aug
          Season_End = 30-May
          Season_Allocation = 10000
          Refull_Frac = 0.9
          Trigger_Frac = 0.8
          Return_days = 3
          Maximum_Irrigation_Amount = 40
          Top_Depth = 600
          script: same as in PotentialYieldTest.CropCompBase.Field.AutomaticIrrigation
        Manager SowAndHarvest: same as PotentialYieldTest.CropCompBase.Field.SowAndHarvest
        Manager ApplyFertOnDates: same as PotentialYieldTest.CropCompBase.Field.ApplyFertOnDates
        SprumPastureInstance BasePasture: AgeAtSimulationStart=1; YearsToMaxDimension=1; RUE=1; Presidue=0.15; RsenRate=0.01; Proot=0.1; PSBaseT=5; PSLOptT=20; PSUOptT=25; PSMaxT=35; GRINZ=false; MaxRD=600; MaxHeight=300; MaxPrunedHeight=100; MaxCover=0.97; MinCover=0.5; ExtinctCoeff=0.7; RegrowthDuration=300; FullCanopyDuration=0; BaseT=5; OptT=25; MaxT=35; RootNConc=0.01; LeafNConc=0.05; ResidueNConc=0.01; LegumePropn=1; GSMax=0.006; R50=120; WaterStress=false
        BiomassRemovalEvents OnCut: same as PotentialYieldTest.CropCompBase.Field.OnCut
  Experiment FullCanopyTest
    Memo Description
      Eaxining APSIM values for N upatkes
    Factors
      Permutation
        Factor Regrowth: same as RegrowthTest.Factors.Permutation.Duration
        Factor FullCanopy
          CompositeFactor None: Specifications=[BasePasture].FullCanopyDuration = 0
          CompositeFactor Mid: Specifications=[BasePasture].FullCanopyDuration = 200
          CompositeFactor High: Specifications=[BasePasture].FullCanopyDuration = 400
    Simulation FullCanopyBase
      Weather: FileName=%root%/Examples/WeatherFiles/NZ_Lincoln
      Clock: Start=1999-08-01; End=2000-08-01
      Summary
      SoilArbitrator Soil Arbitrator
      Zone Field: Area=1; Slope=0; AspectAngle=0; Altitude=50
        MicroClimate: a_interception=0; b_interception=1; c_interception=0; d_interception=0; SoilHeatFluxFraction=0.4; MinimumHeightDiffForNewLayer=0; NightInterceptionFraction=0.5; ReferenceHeight=2
        Soil: same as PotentialYieldTest.CropCompBase.Field.Soil
        SurfaceOrganicMatter surface organic matter: InitialResidueName=wheat; InitialResidueType=wheat; InitialResidueMass=2000; InitialStandingFraction=0; InitialCPR=0; InitialCNR=80
        Irrigation
        Fertiliser
        Report: same as PotentialYieldTest.CropCompBase.Field.Report
        Plant SPRUM
        Manager AutomaticIrrigation: same as PotentialYieldTest.CropCompBase.Field.AutomaticIrrigation
        Manager SowAndHarvest: same as PotentialYieldTest.CropCompBase.Field.SowAndHarvest
        Manager ApplyFertOnDates: same as PotentialYieldTest.CropCompBase.Field.ApplyFertOnDates
        SprumPastureInstance BasePasture: AgeAtSimulationStart=1; YearsToMaxDimension=1; RUE=1; Presidue=0.15; RsenRate=0.01; Proot=0.1; PSBaseT=5; PSLOptT=20; PSUOptT=25; PSMaxT=35; GRINZ=false; MaxRD=600; MaxHeight=300; MaxPrunedHeight=100; MaxCover=0.97; MinCover=0.1; ExtinctCoeff=0.7; RegrowthDuration=300; FullCanopyDuration=0; BaseT=5; OptT=25; MaxT=35; RootNConc=0.01; LeafNConc=0.05; ResidueNConc=0.01; LegumePropn=1; GSMax=0.006; R50=120; WaterStress=false
        BiomassRemovalEvents OnCut: same as PotentialYieldTest.CropCompBase.Field.OnCut
  Experiment WaterStressTest
    Memo Description
      Eaxining APSIM values for N upatkes
    Factors
      Permutation
        Factor IrrigResponse
          CompositeFactor Sensitive: Specifications=[BasePasture].WaterStress = true
          CompositeFactor Not: Specifications=[BasePasture].WaterStress = false
        Factor Irrigation
          CompositeFactor Wet: Specifications=[AutomaticIrrigation].Script.Irrigation_Yes_No = yes
          CompositeFactor Dry: Specifications=[AutomaticIrrigation].Script.Irrigation_Yes_No = no
    Simulation IrrigBase
      Weather: FileName=%root%/Examples/WeatherFiles/NZ_Lincoln
      Clock: Start=1999-08-01; End=2000-08-01
      Summary
      SoilArbitrator Soil Arbitrator
      Zone Field: Area=1; Slope=0; AspectAngle=0; Altitude=50
        MicroClimate: a_interception=0; b_interception=1; c_interception=0; d_interception=0; SoilHeatFluxFraction=0.4; MinimumHeightDiffForNewLayer=0; NightInterceptionFraction=0.5; ReferenceHeight=2
        Soil: same as PotentialYieldTest.CropCompBase.Field.Soil
        SurfaceOrganicMatter surface organic matter: InitialResidueName=wheat; InitialResidueType=wheat; InitialResidueMass=2000; InitialStandingFraction=0; InitialCPR=0; InitialCNR=80
        Irrigation
        Fertiliser
        Report: EventNames=[Clock].DoReport
          VariableNames:
            [Clock].Today
            [SPRUM].IsAlive
            [SPRUM].DaysAfterSowing
            [SPRUM].Phenology.CurrentPhaseName
            [SPRUM].Phenology.Stage
            [SPRUM].Residue.Wt
            [Phenology].AccumulatedTT
            [SPRUM].Total.Wt
            [SPRUM].Total.N
            [SPRUM].Leaf.Photosynthesis
            [SPRUM].Leaf.Transpiration
            [SPRUM].Root.Depth
            [SPRUM].Leaf.CoverGreen
            [SPRUM].Leaf.LAI
            [SPRUM].Height
            [SPRUM].Leaf.Wt
            [SPRUM].Root.NUptake
            [SPRUM].Root.Wt
            [SPRUM].Root.NUptakeLayered
            [Fertiliser].NitrogenApplied
            [Irrigation].IrrigationApplied
            [Soil].Water.MM
            [Soil].Nutrient.MineralN
            [Soil].Nutrient.MineralisedN
            [NO3].Flow
            [SowAndHarvest].Script.DAS
        Plant SPRUM
        Manager AutomaticIrrigation
          Irrigation_Yes_No = yes
          Season_Start = 1-Oct
          Season_End = 30-Apr
          Season_Allocation = 1000
          Refull_Frac = 0.9
          Trigger_Frac = 0.7
          Return_days = 3
          Maximum_Irrigation_Amount = 40
          Top_Depth = 600
```csharp
using Newtonsoft.Json;
using Models.PMF.Phen;
using Models.Soils.Nutrients;
using System;
using Models.Core;
using Models.PMF;
using Models.Soils;
using System.Xml.Serialization;
using APSIM.Shared.Utilities;
using Models.PMF.Organs;
using Models.Interfaces;

        
namespace Models
{
   [Serializable] 
   [System.Xml.Serialization.XmlInclude(typeof(Model))]
    public class Script : Model
    {      
        [Link] private ISummary summary;
        [Link] private Irrigation Irrigation;
        [Link] private Clock Clock;
        [Link] private Soil Soil;
        [Link] private Plant SPRUM;
        [Link(Type = LinkType.Path, Path = "[SPRUM].Root")]
        private Root root;
        [Link(Type = LinkType.Path, Path = "[SPRUM].Phenology")]
        private Phenology phenology;
        [Link]
        private IPhysical soilPhysical;
        [Link]
        private ISoilWater waterBalance;
       //Communication to other modules
       
       //User inputs from properties tab
       [Description("Irrigation on (yes or no)")]
       public string Irrigation_Yes_No { get; set; }
       [Description("SeasonStart (dd-MMM)")]
       public string Season_Start { get; set; }
       [Description("SeasonEnd (dd-MMM)")]
       public string Season_End { get; set; }
       [Description("Season Allocation (mm)")]
       public double Season_Allocation { get; set; }
       [Description("% PAWC to refill soil to (0-1)")]
       public double Refull_Frac { get; set; }
       [Description("% PAWC to trigger irrigation (0-1)")]
       public double Trigger_Frac { get; set; }
       [Description("Minimum days for irrigation to return")]
       public double Return_days { get; set; }
       [Description("Maximum irrigation application (mm)")]
       public double Maximum_Irrigation_Amount { get; set; }
       [Description("Depth to calculate PAWC (mm)")]
       public double Top_Depth { get; set; }
       
       //Class members
       [JsonIgnore] private bool IrrigationIsAvailable { get; set; }
       [JsonIgnore] public bool SeasonIsOpen { get; set; }
       [JsonIgnore] private bool IrrigatorIsAvailable { get; set; }
       [JsonIgnore] private bool SoilIsDry { get; set; }
       [JsonIgnore] public double Top_DUL { get; set; }
       [JsonIgnore] public double Top_Refull { get; set; }
       [JsonIgnore] public double Top_Trigger { get; set; }
       [JsonIgnore] public double Top_LL { get; set; }
       [JsonIgnore] public double Top_SW { get; set; }
       [JsonIgnore] public double Accumulated_depth { get; set; }   
       [JsonIgnore] public double Days_since_irrigation { get; set; }
       [JsonIgnore] public double Amount_to_apply { get; set; }
       [JsonIgnore] public double Season_Application { get; set; }
        
       //Variables for date logic testing
       [JsonIgnore] public string StartString {get; set;}
       [JsonIgnore] public string EndString {get; set;}
       [JsonIgnore] public DateTime StartDate {get; set;}
       [JsonIgnore] public DateTime EndDate {get; set;}
       [JsonIgnore] public int TodayYear {get; set;}
       [JsonIgnore] public int TodayMonth {get; set;}
       [JsonIgnore] public int StartMonth {get; set;}
       [JsonIgnore] public int EndMonth {get; set;}
       [JsonIgnore] public int TodayDay {get; set;}
       [JsonIgnore] public int StartDay {get; set;}
       [JsonIgnore] public int EndDay {get; set;}
       
    
       //Calculate static soil variables
       [EventSubscribe("StartOfSimulation")]
       private void OnStartOfSimulation(object sender, EventArgs e)
       {   
          //Calculated soil water variables
          Accumulated_depth = 0;
          for (int layer = 0; Accumulated_depth < Top_Depth; layer++)
          {
             Top_LL += soilPhysical.LL15mm[layer];
             Top_DUL += soilPhysical.DULmm[layer];
             Accumulated_depth += soilPhysical.Thickness[layer];
          }
          Top_Refull = Top_LL + (Top_DUL - Top_LL) * Refull_Frac;
       }
       
      
       //Determine daily requirement for irrigation
        [EventSubscribe("StartOfDay")]
           private void OnStartOfDay(object sender, EventArgs e)
           { 
          //Can we irrigate?
          IrrigationIsAvailable = false; 
          if (Irrigation_Yes_No == "yes")
             IrrigationIsAvailable = true; 
    
          //Are we Allowed to Irrigate?
          TodayYear = Clock.Today.Year;
          StartString = Season_Start + "-" + TodayYear.ToString();
          EndString = Season_End + "-" + TodayYear.ToString();
          StartDate = DateTime.Parse(StartString);
          EndDate = DateTime.Parse(EndString);
          TodayMonth = Clock.Today.Month;
          TodayDay = Clock.Today.Day;
          StartDay = StartDate.Day;
          StartMonth = StartDate.Month;
          EndDay = EndDate.Day;
          EndMonth = EndDate.Month;
          
          SeasonIsOpen = false;
          //if we are in the spring and after the start date then yes
          if((Clock.Today.Month > 6) && (Clock.Today >= StartDate))
          SeasonIsOpen = true;
          //if we are in the autumn and before the end date then yes
          if((Clock.Today.Month <= 6) && (Clock.Today <= EndDate))
          SeasonIsOpen = true;
          
         
          //Is the irrigator available?
          IrrigatorIsAvailable = false;
          Days_since_irrigation += 1;
          if (Days_since_irrigation >= Return_days)
             IrrigatorIsAvailable = true;
          
          //Is the soil dry enough to require irrigation?
          SoilIsDry = false;
          double CurrentRootDepth = 0;
          double RootDepth = root.Depth;
          CurrentRootDepth = Math.Max(RootDepth, CurrentRootDepth);
          
          double RelativeRootDepth = Math.Min(1.0, CurrentRootDepth / Top_Depth);
          Top_Trigger = Math.Min(Top_Refull, Top_DUL - (Top_DUL - Top_LL) * RelativeRootDepth * (1-Trigger_Frac)); 
          
          Accumulated_depth = 0;
          Top_SW = 0;
          for (int layer = 0; Accumulated_depth < Top_Depth; layer++)
          {
             Top_SW += waterBalance.SWmm[layer];
             Accumulated_depth += soilPhysical.Thickness[layer];
          }
          if (Top_SW <= Top_Trigger)
             SoilIsDry = true;
                
          //Lets bloody well irrigate then!!!!
          if((IrrigationIsAvailable) && (SeasonIsOpen) && (IrrigatorIsAvailable) && (SoilIsDry)) //The conditions are rife for irrigation
          {
             Amount_to_apply = Math.Min(Top_Refull - Top_SW, Maximum_Irrigation_Amount);
             Amount_to_apply = Math.Min(Amount_to_apply, Season_Allocation - Season_Application); 
             Amount_to_apply = Math.Max(Amount_to_apply, 0.0);
             Irrigation.Apply(Amount_to_apply);
             Days_since_irrigation = 0;
             Season_Application += Amount_to_apply;
             summary.WriteMessage(this, "Automatic Irrigation", MessageType.Diagnostic);
            
          }
       }
    }
}
```
        Manager SowAndHarvest: same as PotentialYieldTest.CropCompBase.Field.SowAndHarvest
        Manager ApplyFertOnDates
          FertiliserType = NO3N
          FertiliserDates = 1-Aug, 15-Aug, 1-Sep, 15-Sep, 1-Nov, 15-Nov, 1-dec, 15-dec, 1-Jan, 15-Jan, 1-Feb, 15-Feb, 1-Mar, 15-Mar
          Amount = 50
          AmountType = True
          script: same as in PotentialYieldTest.CropCompBase.Field.ApplyFertOnDates
        SprumPastureInstance BasePasture: AgeAtSimulationStart=1; YearsToMaxDimension=1; RUE=1; Presidue=0.15; RsenRate=0.01; Proot=0.1; PSBaseT=5; PSLOptT=25; PSUOptT=25; PSMaxT=40; GRINZ=false; MaxRD=600; MaxHeight=300; MaxPrunedHeight=100; MaxCover=0.97; MinCover=0.5; ExtinctCoeff=0.7; RegrowthDuration=300; FullCanopyDuration=0; BaseT=5; OptT=25; MaxT=35; RootNConc=0.01; LeafNConc=0.05; ResidueNConc=0.01; LegumePropn=0; GSMax=0.006; R50=120; WaterStress=true
        BiomassRemovalEvents OnCut: same as PotentialYieldTest.CropCompBase.Field.OnCut
  Experiment UserGrazeTest
    Memo Description
      This simulation tests using a biomassRemovalEvents model to do grazing and phenology rewind
      By setting a large value for the FullCanopyDurtion parameter, SPRUM does not reach the end of this phase so it does not self graze and rewind.  Instead we set defoliation dates and the stage to rewind to in the biomass removal event so we can specify defoliations on specific dates.
    Factors
      Permutation
        Factor Grazing
          CompositeFactor None
          CompositeFactor One: Specifications=[OnCut].RemovalDates = 1/2/2000
          CompositeFactor Three: Specifications=[OnCut].RemovalDates = 1-12-1999, 20/2/2000, 2000-4-15
    Simulation UserGraseBase
      Weather: FileName=%root%/Examples/WeatherFiles/NZ_Lincoln
      Clock: Start=1999-08-01; End=2000-08-01
      Summary
      SoilArbitrator Soil Arbitrator
      Zone Field: Area=1; Slope=0; AspectAngle=0; Altitude=50
        MicroClimate: a_interception=0; b_interception=1; c_interception=0; d_interception=0; SoilHeatFluxFraction=0.4; MinimumHeightDiffForNewLayer=0; NightInterceptionFraction=0.5; ReferenceHeight=2
        Soil: same as PotentialYieldTest.CropCompBase.Field.Soil
        SurfaceOrganicMatter surface organic matter: InitialResidueName=wheat; InitialResidueType=wheat; InitialResidueMass=2000; InitialStandingFraction=0; InitialCPR=0; InitialCNR=80
        Irrigation
        Fertiliser
        Report: same as PotentialYieldTest.CropCompBase.Field.Report
        Plant SPRUM
        Manager AutomaticIrrigation: same as PotentialYieldTest.CropCompBase.Field.AutomaticIrrigation
        Manager SowAndHarvest: same as PotentialYieldTest.CropCompBase.Field.SowAndHarvest
        Manager ApplyFertOnDates: same as PotentialYieldTest.CropCompBase.Field.ApplyFertOnDates
        SprumPastureInstance BasePasture: AgeAtSimulationStart=1; YearsToMaxDimension=1; RUE=1; Presidue=0.15; RsenRate=0.01; Proot=0.1; PSBaseT=5; PSLOptT=20; PSUOptT=25; PSMaxT=35; GRINZ=false; MaxRD=600; MaxHeight=300; MaxPrunedHeight=100; MaxCover=0.97; MinCover=0.1; ExtinctCoeff=0.7; RegrowthDuration=300; FullCanopyDuration=10000; BaseT=5; OptT=25; MaxT=35; RootNConc=0.01; LeafNConc=0.05; ResidueNConc=0.01; LegumePropn=1; GSMax=0.006; R50=120; WaterStress=false
        BiomassRemovalEvents OnCut: NameOfPlantToRemoveFrom=SPRUM; RemovalType=0; StageToSet=StartRegrowth
          BiomassRemovalFractions:
            PlantName  OrganName  TypeString  LiveToRemove  DeadToRemove  LiveToResidue  DeadToResidue
            SPRUM      Residue    Cutting     0             0             0              0
            SPRUM      Leaf       Cutting     0.7           0             0.25           0.5
            SPRUM      Nodule     Cutting     0             0             0              0
            SPRUM      Root       Cutting     0             0             0              0
  Experiment LandP
    Memo
      This experiment was run over 3 years in Lincoln, New Zealand on a shallow stony soil.  It is described in full by [Teixeira_Brown_Michel_Meenken_Hu_Thomas_Huth_Holzworth_2018] Treatments of Lucerne and Pasture (Ryegrass) were established in the Autumn of 2011 and irrigtion treatments were installed in the spring of 2011 and applied for three years.  Treatments were:

       - None where no irrigation was applied
       - TwoPerWeek where irrigation was applied twice per week during spring/summer/autumn to replace water use measured by neutron probe
       - OnePerWeek where the same amout of irrigation was applied as the above treatment but at weekly frequency (i.e fewer, larger irrigations)
       - ThreeWeekly where the same amount of irrigation was applied as abouve but at a 3 weekely frequency (i.e fewer, larger irrigations)

      Lucerne and pasture were defoliated at differing frequiencies following best mananagment practice resulting in 8-10 regrowth period per year for pasture and 5-6 for lucerne.  Neutron probes were installed to 1.6 m depth using a 20T digger with a pnumatic plate on its boom to drive and extract a pilot rod into the stony sub soil and then an aluminum access tube was installed into the resultant hole.  Neutron probes measurements were tatken at 7 - 10 day intervals during the irrigation season.  CS616 probes were also installed in the top soil at 0-15 and 15-30 cm depths in each plot and logged hourly.
    Factors
      Permutation
        Factor Irrigation
          CompositeFactor TwoPerWeek: Specifications=[IrrigationEvents]
            Operations IrrigationEvents
              2011-11-07  [Irrigation].Apply(30);
              2011-11-25  [Irrigation].Apply(13.6);
              2011-11-28  [Irrigation].Apply(20.1);
              2011-11-29  [Irrigation].Apply(16.4);
              2011-12-05  [Irrigation].Apply(27);
              2011-12-15  [Irrigation].Apply(8);
              2011-12-26  [Irrigation].Apply(22.5);
              2011-12-29  [Irrigation].Apply(16.5);
              2012-01-05  [Irrigation].Apply(22.8);
              2012-01-09  [Irrigation].Apply(17.8);
              2012-01-12  [Irrigation].Apply(9.1);
              2012-01-16  [Irrigation].Apply(18.3);
              2012-01-19  [Irrigation].Apply(18.6);
              2012-01-23  [Irrigation].Apply(22.5);
              2012-01-30  [Irrigation].Apply(8);
              2012-02-02  [Irrigation].Apply(12);
              2012-02-07  [Irrigation].Apply(16.5);
              2012-02-09  [Irrigation].Apply(13.3);
              2012-02-13  [Irrigation].Apply(12.2);
              2012-02-20  [Irrigation].Apply(13.3);
              2012-02-23  [Irrigation].Apply(8.8);
              2012-03-29  [Irrigation].Apply(10);
              2012-04-02  [Irrigation].Apply(6.5);
              2012-04-05  [Irrigation].Apply(5);
              2012-04-10  [Irrigation].Apply(6.9);
              2012-04-26  [Irrigation].Apply(4.6);
              2012-04-30  [Irrigation].Apply(6.9);
              2012-05-03  [Irrigation].Apply(3.2);
              2012-11-01  [Irrigation].Apply(18);
              2012-11-15  [Irrigation].Apply(12);
              2012-11-22  [Irrigation].Apply(12);
              2012-11-26  [Irrigation].Apply(12);
              2012-11-29  [Irrigation].Apply(12);
              2012-12-03  [Irrigation].Apply(6);
              2012-12-06  [Irrigation].Apply(12);
              2012-12-13  [Irrigation].Apply(12);
              2012-12-17  [Irrigation].Apply(20.8);
              2012-12-20  [Irrigation].Apply(12);
              2012-12-24  [Irrigation].Apply(12);
              2012-12-27  [Irrigation].Apply(9);
              2012-12-31  [Irrigation].Apply(12);
              2013-01-03  [Irrigation].Apply(12);
              2013-01-07  [Irrigation].Apply(18);
              2013-01-10  [Irrigation].Apply(18);
              2013-01-14  [Irrigation].Apply(21);
              2013-01-21  [Irrigation].Apply(15);
              2013-01-24  [Irrigation].Apply(15);
              2013-01-28  [Irrigation].Apply(15);
              2013-01-31  [Irrigation].Apply(15);
              2013-02-04  [Irrigation].Apply(18);
              2013-02-07  [Irrigation].Apply(6);
              2013-02-11  [Irrigation].Apply(18.7);
              2013-02-14  [Irrigation].Apply(13.5);
              2013-02-18  [Irrigation].Apply(15);
              2013-02-21  [Irrigation].Apply(15);
              2013-02-25  [Irrigation].Apply(15);
              2013-02-28  [Irrigation].Apply(32);
              2013-03-07  [Irrigation].Apply(12);
              2013-03-11  [Irrigation].Apply(9);
              2013-03-14  [Irrigation].Apply(9);
              2013-03-28  [Irrigation].Apply(18);
              2013-04-04  [Irrigation].Apply(9);
              2013-04-11  [Irrigation].Apply(9);
              2013-10-24  [Irrigation].Apply(9);
              2013-10-31  [Irrigation].Apply(15);
              2013-11-04  [Irrigation].Apply(6);
              2013-11-07  [Irrigation].Apply(9);
              2013-11-11  [Irrigation].Apply(9);
              2013-11-14  [Irrigation].Apply(9);
              2013-11-18  [Irrigation].Apply(12);
              2013-11-21  [Irrigation].Apply(12);
              2013-11-25  [Irrigation].Apply(9);
              2013-12-02  [Irrigation].Apply(9);
              2013-12-05  [Irrigation].Apply(12);
              2013-12-09  [Irrigation].Apply(6);
              2013-12-12  [Irrigation].Apply(11);
              2013-12-17  [Irrigation].Apply(15);
              2013-12-23  [Irrigation].Apply(7);
              2014-01-06  [Irrigation].Apply(14);
              2014-01-09  [Irrigation].Apply(12.6);
              2014-01-13  [Irrigation].Apply(15.7);
              2014-01-16  [Irrigation].Apply(14.7);
              2014-01-20  [Irrigation].Apply(17.5);
              2014-01-23  [Irrigation].Apply(7.5);
              2014-01-30  [Irrigation].Apply(10);
              2014-02-03  [Irrigation].Apply(12);
              2014-02-05  [Irrigation].Apply(10);
              2014-02-10  [Irrigation].Apply(9);
              2014-02-17  [Irrigation].Apply(10);
              2014-02-20  [Irrigation].Apply(10);
          CompositeFactor OnePerWeek: Specifications=[IrrigationEvents]
            Operations IrrigationEvents
              2011-11-07  [Irrigation].Apply(30);
              2011-11-25  [Irrigation].Apply(13.6);
              2011-11-29  [Irrigation].Apply(36.5);
              2011-12-15  [Irrigation].Apply(34.9);
              2011-12-29  [Irrigation].Apply(41.8);
              2012-01-05  [Irrigation].Apply(22.8);
              2012-01-12  [Irrigation].Apply(26.9);
              2012-01-19  [Irrigation].Apply(36.8);
              2012-02-02  [Irrigation].Apply(19.8);
              2012-02-09  [Irrigation].Apply(30);
              2012-02-16  [Irrigation].Apply(13);
              2012-02-23  [Irrigation].Apply(14.3);
              2012-03-29  [Irrigation].Apply(10);
              2012-04-05  [Irrigation].Apply(11.4);
              2012-04-26  [Irrigation].Apply(11.5);
              2012-05-03  [Irrigation].Apply(10.1);
              2012-11-01  [Irrigation].Apply(18);
              2012-11-15  [Irrigation].Apply(12);
              2012-11-29  [Irrigation].Apply(24);
              2012-12-13  [Irrigation].Apply(21);
              2012-12-27  [Irrigation].Apply(33);
              2013-01-10  [Irrigation].Apply(42);
              2013-01-24  [Irrigation].Apply(39);
              2013-02-07  [Irrigation].Apply(30);
              2013-02-21  [Irrigation].Apply(42);
              2013-02-28  [Irrigation].Apply(20);
              2013-03-07  [Irrigation].Apply(30);
              2013-04-04  [Irrigation].Apply(27);
              2013-04-18  [Irrigation].Apply(15);
              2013-10-24  [Irrigation].Apply(12);
              2013-11-07  [Irrigation].Apply(24);
              2013-11-21  [Irrigation].Apply(33);
              2013-12-05  [Irrigation].Apply(30);
              2013-12-19  [Irrigation].Apply(17);
              2014-01-02  [Irrigation].Apply(12.7);
              2014-01-16  [Irrigation].Apply(40.9);
              2014-01-30  [Irrigation].Apply(35);
              2014-02-13  [Irrigation].Apply(25);
              2014-02-27  [Irrigation].Apply(32);
          CompositeFactor ThreeWeekly: Specifications=[IrrigationEvents]
            Operations IrrigationEvents
              2011-11-07  [Irrigation].Apply(30);
              2011-11-29  [Irrigation].Apply(47.6);
              2011-12-15  [Irrigation].Apply(34.9);
              2011-12-29  [Irrigation].Apply(41.8);
              2012-01-12  [Irrigation].Apply(49.8);
              2012-01-26  [Irrigation].Apply(36.8);
              2012-02-09  [Irrigation].Apply(49.6);
              2012-02-23  [Irrigation].Apply(34.3);
              2012-04-05  [Irrigation].Apply(21.4);
              2012-05-03  [Irrigation].Apply(23.7);
              2012-11-01  [Irrigation].Apply(18);
              2012-11-22  [Irrigation].Apply(12);
              2012-12-13  [Irrigation].Apply(27);
              2013-01-03  [Irrigation].Apply(42);
              2013-01-24  [Irrigation].Apply(45);
              2013-02-14  [Irrigation].Apply(90.6);
              2013-02-28  [Irrigation].Apply(20);
              2013-03-07  [Irrigation].Apply(30);
              2013-03-28  [Irrigation].Apply(18);
              2013-04-18  [Irrigation].Apply(15);
              2013-10-24  [Irrigation].Apply(12);
              2013-11-14  [Irrigation].Apply(33);
              2013-12-05  [Irrigation].Apply(36);
              2014-01-16  [Irrigation].Apply(44.7);
              2014-02-05  [Irrigation].Apply(33.5);
              2014-02-27  [Irrigation].Apply(32);
          CompositeFactor None: Specifications=[IrrigationEvents]
            Operations IrrigationEvents
              2013-02-28  [Irrigation].Apply(20);
        Factor CoverType
          CompositeFactor Lucerne
            Specifications:
              [BasePasture]
              [Spectral].GreenCropNDVI = 0.95
              [GrazingSchedule]
            SprumPastureInstance BasePasture: EstablishDate=10-Mar; AgeAtSimulationStart=0; YearsToMaxDimension=2; RUE=1.6; Presidue=0.15; RsenRate=0.01; Proot=0.1; PSBaseT=5; PSLOptT=25; PSUOptT=25; PSMaxT=40; GRINZ=false; MaxRD=2500; MaxHeight=500; MaxPrunedHeight=50; MaxCover=0.97; MinCover=0.05; ExtinctCoeff=0.85; RegrowthDuration=300; FullCanopyDuration=10000; BaseT=8; OptT=25; MaxT=35; RootNConc=0.01; LeafNConc=0.05; ResidueNConc=0.01; LegumePropn=1; GSMax=0.008; R50=175; WaterStress=true
            Operations GrazingSchedule
              2011-07-01  [CutPasture].Remove()
              2011-11-01  [CutPasture].Remove()
              2011-12-21  [CutPasture].Remove()
              2012-01-26  [CutPasture].Remove()
              2012-03-01  [CutPasture].Remove()
              2012-05-24  [CutPasture].Remove()
              2012-11-01  [CutPasture].Remove()
              2012-12-20  [CutPasture].Remove()
              2013-01-24  [CutPasture].Remove()
              2013-02-28  [CutPasture].Remove()
              2013-03-28  [CutPasture].Remove()
              2013-05-10  [CutPasture].Remove()
              2013-10-31  [CutPasture].Remove()
              2013-12-17  [CutPasture].Remove()
              2014-01-23  [CutPasture].Remove()
              2014-02-27  [CutPasture].Remove()
              2014-05-03  [CutPasture].Remove()
          CompositeFactor Ryegrass
            Specifications:
              [BasePasture]
              [Spectral].GreenCropNDVI = 0.95
              [GrazingSchedule]
              [FertiliserSchedule]
            SprumPastureInstance BasePasture: EstablishDate=24-Mar; AgeAtSimulationStart=0; YearsToMaxDimension=1; RUE=1; Presidue=0.15; RsenRate=0.01; Proot=0.1; PSBaseT=0; PSLOptT=16; PSUOptT=16; PSMaxT=25; GRINZ=false; MaxRD=800; MaxHeight=300; MaxPrunedHeight=100; MaxCover=0.97; MinCover=0.1; ExtinctCoeff=0.6; RegrowthDuration=500; FullCanopyDuration=10000; BaseT=0; OptT=20; MaxT=30; RootNConc=0.01; LeafNConc=0.025; ResidueNConc=0.01; LegumePropn=0; GSMax=0.004; R50=150; WaterStress=true
            Operations GrazingSchedule
              2011-07-01  [CutPasture].Remove()
              2011-09-30  [CutPasture].Remove()
              2011-11-02  [CutPasture].Remove()
              2011-12-01  [CutPasture].Remove()
              2011-12-21  [CutPasture].Remove()
              2012-01-26  [CutPasture].Remove()
              2012-03-01  [CutPasture].Remove()
              2012-04-04  [CutPasture].Remove()
              2012-05-24  [CutPasture].Remove()
              2012-09-08  [CutPasture].Remove()
              2012-10-17  [CutPasture].Remove()
              2012-11-20  [CutPasture].Remove()
              2012-12-20  [CutPasture].Remove()
              2013-01-24  [CutPasture].Remove()
              2013-02-28  [CutPasture].Remove()
              2013-03-28  [CutPasture].Remove()
              2013-05-10  [CutPasture].Remove()
              2013-09-11  [CutPasture].Remove()
              2013-10-18  [CutPasture].Remove()
              2013-11-21  [CutPasture].Remove()
              2013-12-17  [CutPasture].Remove()
              2014-01-23  [CutPasture].Remove()
              2014-02-27  [CutPasture].Remove()
              2014-03-26  [CutPasture].Remove()
              2014-05-03  [CutPasture].Remove()
            Operations FertiliserSchedule
              2011-03-25  [Fertiliser].Apply(amount:40 , type:NO3N)
              2011-08-12  [Fertiliser].Apply(amount:100, type:NO3N)
              2011-10-01  [Fertiliser].Apply(amount:100, type:NO3N)
              2011-11-02  [Fertiliser].Apply(amount:122, type:NO3N)
              2011-12-05  [Fertiliser].Apply(amount:79 , type:NO3N)
              2011-12-29  [Fertiliser].Apply(amount:81 , type:NO3N)
              2012-02-01  [Fertiliser].Apply(amount:100, type:NO3N)
              2012-03-02  [Fertiliser].Apply(amount:115, type:NO3N)
              2012-04-10  [Fertiliser].Apply(amount:102, type:NO3N)
              2012-09-11  [Fertiliser].Apply(amount:100, type:NO3N)
              2012-10-18  [Fertiliser].Apply(amount:102, type:NO3N)
              2012-11-29  [Fertiliser].Apply(amount:115, type:NO3N)
              2013-01-14  [Fertiliser].Apply(amount:81 , type:NO3N)
              2013-02-28  [Fertiliser].Apply(amount:93 , type:NO3N)
              2013-04-02  [Fertiliser].Apply(amount:84 , type:NO3N)
              2013-09-12  [Fertiliser].Apply(amount:100, type:NO3N)
              2013-10-14  [Fertiliser].Apply(amount:81 , type:NO3N)
              2013-12-24  [Fertiliser].Apply(amount:71 , type:NO3N)
              2014-02-28  [Fertiliser].Apply(amount:117, type:NO3N)
              2014-04-04  [Fertiliser].Apply(amount:74 , type:NO3N)
    Simulation LandPBase
      Weather: FileName=%root%/Examples/WeatherFiles/NZ_Lincoln
      Clock: Start=2011-03-01; End=2014-05-01
      Summary
      SoilArbitrator Soil Arbitrator
      Zone Field: Area=1; Slope=0; AspectAngle=0; Altitude=50
        Soil: Latitude=0; Longitude=0
          Chemical: PHUnits=Water
            Thickness  PH   CEC
            100        6.6  12.44
            200        6.2  11.6525
            300        5.7  11.045
            300        5.5  10.6625
            300        5.5  9.4025
            300        5.5  9.4025
            CEC source: Calculated
          Water: InitialPAWmm=240; RelativeTo=LL15; FilledFromTop=false
            Thickness=[150, 150, 100, 200, 200, 200, 200, 200, 200, 200, 200, 200, 400]
            InitialValues=[0.33, 0.33, 0.31, 0.15, 0.1, 0.06, 0.15, 0.1, 0.13, 0.13, 0.13, 0.13, 0.13]
          Physical
            Thickness  ParticleSizeSand  ParticleSizeSilt  ParticleSizeClay  Rocks     BD   AirDry  LL15  DUL   SAT
            150        5                 65                30                0         1.2  0.05    0.1   0.33  0.5
            150        5                 65                30                0         1.2  0.1     0.1   0.33  0.5
            100        5                 65                30                0.135336  1.2  0.12    0.12  0.31  0.44
            200        5                 65                30                0         1.2  0.06    0.06  0.15  0.46
            200        5                 65                30                0.135336  1.2  0.04    0.04  0.1   0.44
            200        5                 65                30                0.135336  1.2  0.02    0.02  0.06  0.44
            200        5                 65                30                0         1.2  0.06    0.06  0.15  0.46
            200        5                 65                30                0.135336  1.2  0.04    0.04  0.1   0.44
            200        5                 65                30                0.135336  1.2  0.06    0.06  0.13  0.44
            200        5                 65                30                0.135336  1.2  0.06    0.06  0.13  0.44
            200        5                 65                30                0.135336  1.2  0.06    0.06  0.13  0.44
            200        5                 65                30                0.135336  1.2  0.06    0.06  0.13  0.44
            400        5                 65                30                0.135336  1.2  0.06    0.06  0.13  0.44
            Rocks, ParticleSizeSand, ParticleSizeSilt, ParticleSizeClay source: Calculated
            SoilCrop SPRUMSoil
              LL=[0.1, 0.1, 0.12, 0.06, 0.04, 0.02, 0.06, 0.04, 0.06, 0.06, 0.06, 0.06, 0.06]
              KL=[0.11, 0.11, 0.11, 0.11, 0.11, 0.11, 0.11, 0.11, 0.11, 0.11, 0.11, 0.11, 0.11]
              XF=[1, 1, 1, 1, 1, 1, 1, 1, 1, 1, 1, 1, 1]
          WaterBalance SoilWater: SummerDate=1-Nov; SummerU=9; SummerCona=4.4; WinterDate=1-Apr; WinterU=9; WinterCona=4.4; DiffusConst=88; DiffusSlope=35.4; Salb=0.18; CN2Bare=68; CNRed=20; CNCov=0.8; DischargeWidth=0; CatchmentArea=0; PSIDul=-100
            Thickness  SWCON  KLAT
            150        0.55   0
            150        0.55   0
            100        0.55   0
            200        0.55   0
            200        0.55   0
            200        0.55   0
            200        0.55   0
            200        0.55   0
            200        0.55   0
            200        0.55   0
            200        0.55   0
            200        0.55   0
            400        0.55   0
          Nutrient
          Organic: FOMCNRatio=30; CarbonUnits=Total
            Thickness  Carbon  SoilCNRatio  FBiom  FInert  FOM
            100        1.82    11.5         0.025  0.3     1243.93
            200        1.47    11.5         0.025  0.4     833.832
            300        1.2     11.5         0.015  0.75    457.617
            300        1.03    11.5         0.01   0.9     251.145
            300        0.47    11.5         0.01   0.96    137.831
            300        0.47    11.5         0.01   0.96    75.6435
          Solute NO3: Thickness=[100, 200, 300, 300, 300, 300]; InitialValues=[180.833, 12.5, 1.38889, 1.38889, 0, 0]; InitialValuesUnits=ppm; WaterTableConcentration=0; D0=0; DepthConstant=0; MaxDepthSoluteAccessible=0; RunoffEffectivenessAtMovingSolute=0; MaxEffectiveRunoff=0
          Solute NH4: Thickness=[100, 200, 300, 300, 300, 300]; InitialValues=[0, 0, 0, 0, 0, 0]; InitialValuesUnits=ppm; WaterTableConcentration=0; D0=0; DepthConstant=0; MaxDepthSoluteAccessible=0; RunoffEffectivenessAtMovingSolute=0; MaxEffectiveRunoff=0
          Solute Urea: Thickness=[100, 200, 300, 300, 300, 300]; InitialValues=[0, 0, 0, 0, 0, 0]; InitialValuesUnits=kg/ha; WaterTableConcentration=0; D0=0; DepthConstant=0; MaxDepthSoluteAccessible=0; RunoffEffectivenessAtMovingSolute=0; MaxEffectiveRunoff=0
          SoilTemperature Temperature
          OutputLayers SWOutputLayers: Thickness=[150, 150, 100, 200, 200, 200, 200, 200, 200]
        MicroClimate: a_interception=0; b_interception=1; c_interception=0; d_interception=0; SoilHeatFluxFraction=0.4; MinimumHeightDiffForNewLayer=0; NightInterceptionFraction=0.5; ReferenceHeight=2
        Irrigation
        Fertiliser
        SurfaceOrganicMatter surface organic matter: InitialResidueName=wheat; InitialResidueType=wheat; InitialResidueMass=2000; InitialStandingFraction=0; InitialCPR=0; InitialCNR=80
        Operations IrrigationEvents
        Operations GrazingSchedule
        Operations FertiliserSchedule
        Report: EventNames=[Clock].EndOfDay
          VariableNames:
            [Clock].Today
            [SurfaceOrganicMatter].Wt
            [SWOutputLayers].SWmm
            sum([SWOutputLayers].SWmm)
            [SWOutputLayers].SW
            [Soil].SoilWater.Es
            [Soil].SoilWater.Eos
            [Soil].SoilWater.Runoff
            [Soil].SoilWater.Infiltration
            [Soil].SoilWater.Drainage
            [Soil].Physical.LL15
            [Soil].Physical.DUL
            [Soil].Physical.LL15mm
            [Soil].Physical.DULmm
            [SPRUM].Leaf.CoverDead
            [SPRUM].Leaf.CoverGreen
            [SPRUM].Leaf.CoverTotal
            [SPRUM].Leaf.Height
            [SPRUM].Root.Depth
            [Spectral].NDVI
            [SPRUM].Leaf.Wt
            [SPRUM].Residue.Wt
            [SPRUM].AboveGround.Wt
            [SPRUM].Arbitrator.FN
            [SPRUM].Leaf.FW
            [SPRUM].RelativeAnnualDimension
            [SPRUM].Phenology.Age.YearDecimal
            [SPRUM].Leaf.Cover.Regrowth.Expansion.Delta
        Plant SPRUM
        SprumPastureInstance BasePasture: AgeAtSimulationStart=1; YearsToMaxDimension=1; RUE=1; Presidue=0; RsenRate=0; Proot=0.1; PSBaseT=5; PSLOptT=25; PSUOptT=25; PSMaxT=40; GRINZ=false; MaxRD=600; MaxHeight=300; MaxPrunedHeight=100; MaxCover=0.97; MinCover=0.5; ExtinctCoeff=0.7; RegrowthDuration=300; FullCanopyDuration=0; BaseT=5; OptT=25; MaxT=35; RootNConc=0.01; LeafNConc=0.05; ResidueNConc=0.01; LegumePropn=0; GSMax=0.006; R50=120; WaterStress=true
        BiomassRemovalEvents CutPasture: same as UserGrazeTest.UserGraseBase.Field.OnCut
        Spectral: DrySoilNDVI=0.1; WetSoilNDVI=0.25; DeadCropNDVI=0.1; NDVI=0
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