Simulations: Version=170
  Memo TitlePage
    # The STRUM model
    A simple representation of the shape and mass of rows of fruit trees which can be used in a multizone simulation with a row of mown grass to model the water N and C balance of an orchard system.
  Folder Replacements
    Plant STRUM: PlantType=STRUM
      Memo TitlePage
        # STRUM

        This model has been built using the Plant Modelling Framework (PMF) of [brown_plant_2014] to provide a simple representation of perennial tree and vine crops.  Its scope is intended for use in water and nitrogen balance studies where the focus is on soil processes and a very simple crop is adequate.  The model has simple functions for estimating the growht and nitrogen uptake of different organs and anohter simple function for predicting canopy size so water uptake can be predicted.

        The model has currently been parameterised and tested for 4 genotpes; Apple, Kiwifruit, Grape and Peach.

        STRUM has a simple phenology model that breaks the annual growth cycle into 4 phases:

           1. The <b>Dormancy</b> phase when the tree is a bare trunk, using no water, growing no biomass and taking up no Nitrogen
           2. The <b>CanopyExpansion</b> phase which occurs in the spring when the bulk of biomass assimilation is partitioned to the new leaves with smaller proportions going to trunk and root growth
           3. The <b>FruitGrowth</b> phase where the bulk of biomass assimilation is partitioned to the growing fruit with smaller proportions going to leaf, trunk and root growth
           4. The <b>LeafFall</b> phase where any further biomass assimilated is partitioned to the trunk and roots.

        As infered above the STRUM consists of 4 organs:

           1. <b>Leaf</b> which ls represented with the Simpleleaf class and provides estimates of:
            - Leaf area index that the MicroClimate model uses to estimate the radiation of the tree canopy and the grass in the underlying alley
            - Water uptake demand that the soil arbitrator uses to estimate soil water extraction
            - Photosynthesis estimates (Using radiation use efficiency) to drive tree biomass production
            - Biomass demand that is used to grow leaf biomass and determine N demand for leaf growth
           2. <b>Fruit</b> which represents the biomass and nitrogen that may be removed from the orchard each year as harvested product
           3. <b>Trunk</b> which represents the perennial biomass of the trees and will grow a small amount each year but is mostly pruned out at the end of the year and may be returned to the soil surface.
           4. <b>Root</b> which extracts water and nitrogen from the soil for plant growth, grows a small amount of biomass each year and senesesses a proportion of this to the soil.

        #Inclusion in APSIM simulations
        A STRUM crop is included in a simulation the same as any other APSIM crop

         * The STRUM object needs to be dragged or copied from the Crop folder in the tool box into the field of your simulation.
         * It is then planted with a sowing rule
        ~~~
        STRUM.Sow(cultivar: StaticCrop, population: 1, depth: 10, rowSpacing: 150);
        ~~~

          * Note that the SimpleTreeModel has no notion of population or rowSpacing but these parameters are required by the Sow method so filler values are provided
          * `depth` in the Sow arguement is the depth that the crop is sown at.  In most cases the Sow argument is used to initialise an established tree crop so sow depth arguement is used to set the root depth of the trees.  This depth should be set to the rooting depth that is expected as roots will not grow during the simulation.

        #Representing and Orchard System
         * While the STRUM model will run as a stand alone model, in most cases fruit trees and vines are grown in rows with a grass or herb ley growing in the alleys.  As such it is important to set up a simulation with two rectangular zones, one with the fruit tree established within and another with the pasture or herb ley established.  In most cases a SPRUM is adequate to represent the energy, water and nitrogen balance of the alleys.
         * As part of the development of this crop model the Microclimate radiation arbitration was improved to be suitable for fruit crop set ups.  This involved modifying the strip crop radiation interception code to allow:
           1. The entire depth of the tallest (tree) canopy to be taller than the grass growing in the alleys
           2. The width of the canopy of the trees to exceed the width of the zone that the trees are planted in so they may intercept more radiation that would be possible if they were kept within the spatial confines of the row zone
        ![Schematic of radiation interception scheme as modeled for tree row crops](RadInt.jpg)

        #Further development requirements
        The greatest effort has been spent on getting the models water balance predictions working to an adequate standard.  This included running an optimisation procedure against the validation data set to obtain the most suitalbe parameters for water extraction parameters (kl pattern through the soil) and water demand parameters (max canopy conductance and conductance response to light) as well as weather the roots of the alley should be allowed to grow sideways into the row.
        The model has been set up to predict biomass accumulation and N uptake but the parameters for this functionality have not be determined from observed or published data so further work is required here.  The rates of senescence of the FruitTree root system and the contribution of the mown grass in the alley to the N and C balance have not yet been established correctly.
        Kl patterns are currently parameterised in a manager script (so they could be optimised) this needs to be moved into model set up.
        Optimisation was not able to give good fits for both row and alley zones for grape suggesting the kl patterns differ between alley and row.  Further investigation is required to better determine spatial water extraction parameters.
      OrganArbitrator Arbitrator
        BiomassTypeArbitrator DMArbitration
          Folder PotentialPartitioningMethods
            ReallocationMethod
            AllocateFixationMethod
            RetranslocationMethod
            SendPotentialDMAllocationsMethod
          Folder AllocationMethods
            NutrientConstrainedAllocationMethod
            DryMatterAllocationsMethod
          RelativeAllocation ArbitrationMethod
        BiomassTypeArbitrator NArbitration
          Folder PotentialPartitioningMethods
            ReallocationMethod
          Folder ActualPartitioningMethods
            AllocateFixationMethod
            RetranslocationMethod
          Folder AllocationMethods
            NitrogenAllocationsMethod
          RelativeAllocation ArbitrationMethod
          AllocateUptakesMethod
        WaterUptakeMethod
        NitrogenUptakeMethod
      Phenology
        Constant ThermalTime: FixedValue=1; Units=days
        GenericPhase ZeroPhase: Start=ModelInitialisation; End=Dormant; IsEmerged=true
          Memo
            It is necessary to have a phase before Dormancy otherwise the rewind doesn't work
          VariableReference Progression: VariableName=[Phenology].ThermalTime
          Constant Target: FixedValue=0; Units=oCd
        DAWSPhase SpringDormancy: Start=Dormant; End=BudBreak; IsEmerged=true; DAWStoProgress=0
        DAWSPhase CanopyExpansion: Start=BudBreak; End=StartFullCanopy; IsEmerged=true; DAWStoProgress=0
        DAWSPhase FullCanopy: Start=StartFullCanopy; End=StartLeafFall; IsEmerged=true; DAWStoProgress=0
        DAWSPhase LeafFall: Start=StartLeafFall; End=BareTree; IsEmerged=true; DAWStoProgress=0
        DAWSPhase WinterDormancy: Start=BareTree; End=SpringDormant; IsEmerged=true; DAWStoProgress=365
        GotoPhase: Start=BareTree; IsEmerged=true; PhaseNameToGoto=SpringDormancy
        Age
        AddFunction AgeDecimal
          VariableReference AgeInt: VariableName=[Phenology].Age
          DivideFunction Decimal
            VariableReference DOY: VariableName=[Weather].DaysSinceWinterSolstice
            Constant DaysInAYear: FixedValue=365
      Root: GrowthRespiration=0; MaintenanceRespiration=0
        RootShapeCylinder RootShape
        DivideFunction RootFrontVelocity
          VariableReference MaxRootDepth: VariableName=[Root].MaximumRootDepth
          MultiplyFunction RootGrowthDuration
            Constant YearsToMaxDepth: FixedValue=0; Units=years
              Memo Param value set at establishment
                STRUM calculates this parameter value during run-time when the crop is established from parameter values set in the relevent STRUMtree object
            Constant DaysInAYear: FixedValue=365
        Constant MaxDailyNUptake: FixedValue=10; Units=g/m2
        Constant DMConversionEfficiency: FixedValue=1; Units=g/m2
        Constant RemobilisationCost: FixedValue=0
        Constant MaximumRootDepth: FixedValue=3000; Units=mm
        Constant NitrogenDemandSwitch: FixedValue=1; Units=0-1
        KLModiferVsDepthFunction klModifier
          VariableReference LayerDepth: VariableName=[Physical].DepthMidPoints
          VariableReference MaximumRootDepth: VariableName=[Root].MaximumRootDepth
        MultiplyFunction SenescenceRate
          ExponentialFunction: A=0; B=1; C=1
            DivideFunction
              SubtractFunction
                SoilTemperatureDepthFunction: Depth=100
                Constant: FixedValue=20
              Constant: FixedValue=10
          Constant Coefficient: FixedValue=0.015
        Constant SpecificRootLength: FixedValue=105; Units=m/g
        LinearInterpolationFunction KNO3
          XYPairs: X=[0, 0.003]; Y=[0.02, 0.02]
          VariableReference XValue: VariableName=[Root].LengthDensity
        LinearInterpolationFunction KNH4
          XYPairs: X=[0, 0.003]; Y=[0, 0]
          VariableReference XValue: VariableName=[Root].LengthDensity
        BiomassRemoval BiomassRemovalDefaults: HarvestFractionLiveToRemove=0; HarvestFractionDeadToRemove=0; HarvestFractionLiveToResidue=0; HarvestFractionDeadToResidue=0
        LinearInterpolationFunction NUptakeSWFactor
          XYPairs: X=[0, 1]; Y=[0, 1]
          VariableReference XValue: VariableName=[Root].RWC
        Constant CarbonConcentration: FixedValue=0.4
        Constant MaintenanceRespirationFunction: FixedValue=0
        NutrientDemandFunctions DMDemands
          MultiplyFunction Structural
            PartitionFractionDemandFunction DMDemandFunction
              PhaseLookup PartitionFraction
                PhaseLookupValue AcitveGrowth: Start=BudBreak; End=BareTree
                  Constant: FixedValue=0.2
            Constant StructuralFraction: FixedValue=1
          Constant Metabolic: FixedValue=0
          Constant Storage: FixedValue=0
          Constant QStructuralPriority: FixedValue=1
          Constant QMetabolicPriority: FixedValue=1
          Constant QStoragePriority: FixedValue=1
        NutrientDemandFunctions NDemands
          MultiplyFunction Structural
            VariableReference MinNconc: VariableName=[Root].minimumNconc
            VariableReference PotentialDMAllocation: VariableName=[Root].potentialDMAllocation.Structural
          Constant Metabolic: FixedValue=0
          Constant Storage: FixedValue=0
          Constant QStructuralPriority: FixedValue=1
          Constant QMetabolicPriority: FixedValue=1
          Constant QStoragePriority: FixedValue=1
        NutrientPoolFunctions InitialWt
          Constant Structural: FixedValue=0; Units=g/plant
            Memo Param value set at establishment
              STRUM calculates this parameter value during run-time when the crop is established from parameter values set in the relevent STRUMtree object
          Constant Metabolic: FixedValue=0
          Constant Storage: FixedValue=0
        Constant RootDepthStressFactor: FixedValue=1
        Constant MaximumNConc: FixedValue=0
          Memo Param value set at establishment
            STRUM calculates this parameter value during run-time when the crop is established from parameter values set in the relevent STRUMtree object
        VariableReference CriticalNConc: VariableName=[Root].MaximumNConc
        VariableReference MinimumNConc: VariableName=[Root].MaximumNConc
      SimpleLeaf Leaf: Albedo=0.18; LeafInitialisationStage=Dormant
        zero: Gsmax350, R50, Height, BaseHeight, Width, FRGR, PotentialEP, WaterDemand, KDead, LAIDead
        Constant StomatalConductanceCO2Modifier: FixedValue=1
        Constant DetachmentRate: FixedValue=0; Units=/d
        Constant RemobilisationCost: FixedValue=0
        Constant InitialWt: FixedValue=0; Units=g/plant
        Constant LaiDead: FixedValue=0; Units=m^2/m^2
        RUEModel Photosynthesis
          Constant RUE: FixedValue=1.2
          WeightedTemperatureFunction FT: MaximumTemperatureWeighting=0.5
            XYPairs: X=[0, 10, 25, 40]; Y=[0, 1, 1, 0]
          LinearInterpolationFunction FW
            XYPairs: X=[0, 0.8, 1.5]; Y=[0, 1, 1]
            VariableReference XValue: VariableName=[Leaf].Fw
          RUECO2Function FCO2: PhotosyntheticPathway=C3
          VariableReference RadnInt: VariableName=[Leaf].RadiationIntercepted
          Constant FVPD: FixedValue=1
          Constant FN: FixedValue=1
        SubDailyInterpolation FRGR: agregationMethod=0
          XYPairs Response: X=[0, 10, 25, 40]; Y=[0, 1, 1, 0]
          ThreeHourAirTemperature InterpolationMethod
        MultiplyFunction ExtinctionCoefficient
          Constant UnstressedCoeff: FixedValue=0
            Memo Param value set at establishment
              SCRUM calculates this parameter value during run-time when the crop is established from parameter values set in the relevent SCRUMcrop and SCRUMmanagement objects
          LinearInterpolationFunction FW
            XYPairs: X=[0, 0.4, 0.9, 1.5]; Y=[0.2, 0.2, 1, 1]
            VariableReference XValue: VariableName=[Leaf].Fw
        Constant NReallocationFactor: FixedValue=0
        PhaseLookup SenescenceRate
          PhaseLookupValue LeafFall: Start=StartLeafFall; End=BareTree
            Constant: FixedValue=0
        BiomassRemoval BiomassRemovalDefaults: HarvestFractionLiveToRemove=0; HarvestFractionDeadToRemove=0; HarvestFractionLiveToResidue=0; HarvestFractionDeadToResidue=0
        Constant MaintenanceRespiration: FixedValue=0; Units=0-1
        Constant DMConversionEfficiency: FixedValue=1; Units=0-1
        Constant NRetranslocationFactor: FixedValue=0
        Constant NitrogenDemandSwitch: FixedValue=1
        Constant DMReallocationFactor: FixedValue=0
        Constant DMRetranslocationFactor: FixedValue=0
        Constant CarbonConcentration: FixedValue=0.4
        NutrientDemandFunctions DMDemands
          MultiplyFunction Structural
            PartitionFractionDemandFunction DMDemandFunction
              PhaseLookup PartitionFraction
                PhaseLookupValue CanopyExpansion: Start=BudBreak; End=StartFullCanopy
                  Constant: FixedValue=0.6
                PhaseLookupValue FruitGrowth: Start=StartFullCanopy; End=StartLeafFall
                  Constant: FixedValue=0.1
            Constant StructuralFraction: FixedValue=0.5; Units=0-1
          Constant Metabolic: FixedValue=0
          Constant Storage: FixedValue=0
          Constant QStructuralPriority: FixedValue=1
          Constant QMetabolicPriority: FixedValue=1
          Constant QStoragePriority: FixedValue=1
        NutrientDemandFunctions NDemands
          MultiplyFunction Structural
            VariableReference MinNconc: VariableName=[Leaf].minimumNconc
            VariableReference PotentialDMAllocation: VariableName=[Leaf].potentialDMAllocation.Structural
          Constant Metabolic: FixedValue=0
          Constant Storage: FixedValue=0
          Constant QStructuralPriority: FixedValue=1
          Constant QMetabolicPriority: FixedValue=1
          Constant QStoragePriority: FixedValue=1
        VariableReference BaseHeight: VariableName=[STRUM].Height.CanopyBaseHeight
        VariableReference HeightFunction: VariableName=[STRUM].Height
        VariableReference Wideness: VariableName=[STRUM].Width
        MultiplyFunction Area
          Constant Maximum: FixedValue=0; Units=m2/m2
          VariableReference RelativeAnnualDimension: VariableName=[STRUM].RelativeAnnualDimension
          VariableReference RelativeSeasonalDimension: VariableName=[STRUM].RelativeSeasonalDimension
          Constant FrostFactor: FixedValue=1
        Constant MaxNConcAtStartLeafFall: FixedValue=0
          Memo Param value set at establishment
            SCRUM calculates this parameter value during run-time when the crop is established from parameter values set in the relevent SCRUMcrop and SCRUMmanagement objects
        AddFunction MaximumNConc
          VariableReference MaxNConcAtStartLeafFall: VariableName=[Leaf].MaxNConcAtStartLeafFall
          MultiplyFunction EarlyNConcElevation
            SubtractFunction
              Constant YoungLeafNconc: FixedValue=0.04
              VariableReference MaxNConcAtStartLeafFall: VariableName=[Leaf].MaxNConcAtStartLeafFall
            LinearInterpolationFunction DilutionCurve
              XYPairs: X=[1, 3, 4, 5, 6, 7, 8]; Y=[1, 1, 0.1, 0.02, 0, 0, 0]
              VariableReference XValue: VariableName=[Phenology].Stage
        MultiplyFunction CriticalNConc
          Constant StructuralNFactor: FixedValue=0.6
          VariableReference MaxNConcAtStartLeafFall: VariableName=[Leaf].MaxNConcAtStartLeafFall
        MultiplyFunction MinimumNConc
          Constant StructuralNFactor: FixedValue=0.6
          VariableReference MaxNConcAtStartLeafFall: VariableName=[Leaf].MaxNConcAtStartLeafFall
      GenericOrgan Trunk: IsAboveGround=true
        Constant NReallocationFactor: FixedValue=0
        Constant NRetranslocationFactor: FixedValue=0
        Constant DMRetranslocationFactor: FixedValue=0.05
        PhaseLookupValue NitrogenDemandSwitch: Start=BudBreak; End=BareTree
          Constant: FixedValue=1
        BiomassRemoval BiomassRemovalDefaults: HarvestFractionLiveToRemove=0; HarvestFractionDeadToRemove=0; HarvestFractionLiveToResidue=0; HarvestFractionDeadToResidue=0
        Constant SenescenceRate: FixedValue=0; Units=/d
        Constant DetachmentRateFunction: FixedValue=0; Units=/d
        Constant MaintenanceRespirationFunction: FixedValue=0; Units=0-1
        Constant DMConversionEfficiency: FixedValue=1; Units=0-1
        Constant DMReallocationFactor: FixedValue=0
        Constant RemobilisationCost: FixedValue=0
        Constant CarbonConcentration: FixedValue=0.4
        NutrientDemandFunctions DMDemands
          PartitionFractionDemandFunction Structural
            PhaseLookup PartitionFraction
              PhaseLookupValue CanopyExpansion: Start=BudBreak; End=StartFullCanopy
                Constant: FixedValue=0.2
              PhaseLookupValue FruitGrowth: Start=StartFullCanopy; End=StartLeafFall
                Constant: FixedValue=0.15
              PhaseLookupValue LeafFall: Start=StartLeafFall; End=BareTree
                Constant: FixedValue=0
          Constant Metabolic: FixedValue=0
          Constant Storage: FixedValue=0
          Constant QStructuralPriority: FixedValue=1
          Constant QMetabolicPriority: FixedValue=1
          Constant QStoragePriority: FixedValue=1
        NutrientDemandFunctions NDemands
          Constant Storage: FixedValue=0
          Constant Metabolic: FixedValue=0
          MultiplyFunction Structural
            VariableReference MinNconc: VariableName=[Trunk].minimumNconc
            VariableReference PotentialDMAllocation: VariableName=[Trunk].potentialDMAllocation.Structural
          Constant QStructuralPriority: FixedValue=1
          Constant QMetabolicPriority: FixedValue=1
          Constant QStoragePriority: FixedValue=1
        RetranslocateNonStructural RetranslocateNitrogen
        EnergyBalance: Albedo=0.1; Gsmax350=0; R50=0; KDead=0; LAIDead=0
          Constant FRGRer: FixedValue=0
          Constant StomatalConductanceCO2Modifier: FixedValue=1
          VariableReference Tallness: VariableName=[STRUM].Height
          VariableReference Deepness: VariableName=[STRUM].Height
          Constant GreenAreaIndex: FixedValue=0
          MultiplyFunction DeadAreaIndex
            Constant VolumeToArea: FixedValue=0.3; Units=m2/l
            DivideFunction Volume
              VariableReference Wt: VariableName=[Trunk].Wt
              Constant Density: FixedValue=750; Units=g/l
          Constant GreenExtinctionCoefficient: FixedValue=0
          Constant DeadExtinctionCoefficient: FixedValue=0.5
          VariableReference Wideness: VariableName=[STRUM].Width
        NutrientPoolFunctions InitialWt
          Constant Structural: Units=g/m^2
            Memo Param value set at establishment
              STRUM calculates this parameter value during run-time when the crop is established from parameter values set in the relevent STRUMtree object
          Constant Metabolic: FixedValue=0
          Constant Storage: FixedValue=0
        Constant Photosynthesis: FixedValue=0
        VariableReference initialNConcFunction: VariableName=[Trunk].MinimumNConc
        Constant MaximumNConc: FixedValue=0.01
          Memo Param value set at establishment
            SCRUM calculates this parameter value during run-time when the crop is established from parameter values set in the relevent SCRUMcrop and SCRUMmanagement objects
        MultiplyFunction CriticalNConc
          Constant StructuralNFactor: FixedValue=0.6
          VariableReference MaxNConc: VariableName=[Trunk].MaxNConc
        MultiplyFunction MinimumNConc
          Constant StructuralNFactor: FixedValue=0.6
          VariableReference MaxNConc: VariableName=[Trunk].MaxNConc
      GenericOrgan Fruit: IsAboveGround=true
        Constant NReallocationFactor: FixedValue=0
        Constant NRetranslocationFactor: FixedValue=0
        Constant DMRetranslocationFactor: FixedValue=0
        PhaseLookupValue NitrogenDemandSwitch: Start=StartFullCanopy; End=StartLeafFall
          Constant: FixedValue=1
        BiomassRemoval BiomassRemovalDefaults: HarvestFractionLiveToRemove=0.8; HarvestFractionDeadToRemove=0; HarvestFractionLiveToResidue=0.2; HarvestFractionDeadToResidue=1
        Constant SenescenceRate: FixedValue=0; Units=/d
        Constant DetachmentRateFunction: FixedValue=0; Units=/d
        Constant MaintenanceRespirationFunction: FixedValue=0; Units=0-1
        Constant DMConversionEfficiency: FixedValue=1; Units=0-1
        Constant DMReallocationFactor: FixedValue=0
        Constant RemobilisationCost: FixedValue=0
        Constant CarbonConcentration: FixedValue=0.4
        NutrientDemandFunctions DMDemands
          MultiplyFunction Structural
            MaximumFunction RelativeFruitMass
              DeltaFunction Delta
                LinearInterpolationFunction Integral
                  XYPairs: X=[0, 80, 150, 250, 300, 365]; Y=[0, 0, 0.1, 0.9, 1, 1]
                  VariableReference XValue: VariableName=[Weather].DaysSinceWinterSolstice
              Constant Zero: FixedValue=0
            VariableReference Number: VariableName=[Fruit].Number
            VariableReference PotentialDW: VariableName=[Fruit].PotentialDryWt
          Constant Metabolic: FixedValue=0
          Constant Storage: FixedValue=0
          Constant QStructuralPriority: FixedValue=100
          Constant QMetabolicPriority: FixedValue=100
          Constant QStoragePriority: FixedValue=100
        NutrientDemandFunctions NDemands
          Constant Storage: FixedValue=0
          Constant Metabolic: FixedValue=0
          MultiplyFunction Structural
            VariableReference MinNconc: VariableName=[Trunk].minimumNconc
            VariableReference PotentialDMAllocation: VariableName=[Fruit].potentialDMAllocation.Structural
          Constant QStructuralPriority: FixedValue=1
          Constant QMetabolicPriority: FixedValue=1
          Constant QStoragePriority: FixedValue=1
        RetranslocateNonStructural RetranslocateNitrogen
        NutrientPoolFunctions InitialWt
          Constant Structural: FixedValue=0; Units=g/m^2
          Constant Metabolic: FixedValue=0
          Constant Storage: FixedValue=0
        Constant Photosynthesis: FixedValue=0
        VariableReference initialNConcFunction: VariableName=[Fruit].MaximumNConc
        Constant MaxNConcAtHarvest: FixedValue=0
          Memo Param value set at establishment
            SCRUM calculates this parameter value during run-time when the crop is established from parameter values set in the relevent SCRUMcrop and SCRUMmanagement objects
        AddFunction MaximumNConc
          VariableReference MaxNConcAtHarvest: VariableName=[Fruit].MaxNConcAtHarvest
          MultiplyFunction EarlyNConcElevation
            SubtractFunction
              Constant MaxNConcAtSet: FixedValue=4
              VariableReference MaxNConcAtHarvest: VariableName=[Fruit].MaxNConcAtHarvest
            LinearInterpolationFunction DilutionCurve: same as Replacements.STRUM.Leaf.MaximumNConc.EarlyNConcElevation.DilutionCurve
        MultiplyFunction CriticalNConc
          Constant StructuralNFactor: FixedValue=0.6
          VariableReference MaxNConcAtHarvest: VariableName=[Fruit].MaxNConcAtHarvest
        MultiplyFunction MinimumNConc
          Constant StructuralNFactor: FixedValue=0.6
          VariableReference MaxNConcAtHarvest: VariableName=[Fruit].MaxNConcAtHarvest
        Constant MaximumSize: FixedValue=0; Units=mm
        Constant Density: FixedValue=0; Units=g/cm3
        Constant MinimumDMC: FixedValue=0; Units=g/g
        MultiplyFunction PotentialDryWt
          ExpressionFunction Volume: Expression=((4/3*3.1415926*([Fruit].MaximumSize/2)^3/1000
          VariableReference Density: VariableName=[Fruit].Density
          VariableReference DMC: VariableName=[Fruit].MinimumDMC
          VariableReference RelativeAnnualDimension: VariableName=[STRUM].RelativeAnnualDimension
        MultiplyFunction DryMatterPc
          VariableReference UnStressedDM: VariableName=[Fruit].MinimumDMC
          LinearInterpolationFunction FruitAge
            XYPairs: X=[0, 3, 4, 5]; Y=[1, 1, 1, 1]
            VariableReference XValue: VariableName=[Weather].DaysSinceWinterSolstice
          LinearInterpolationFunction WaterStress
            XYPairs: X=[0, 85]; Y=[1, 1]
            VariableReference XValue: VariableName=[AccumulatedWaterStress]
        MultiplyFunction FreshWt
          DivideFunction FreshWtConversion
            Constant: FixedValue=1
            VariableReference DMconc: VariableName=[Fruit].DryMatterPc
          VariableReference DryWt: VariableName=[Fruit].Wt
        MultiplyFunction Number
          Constant RetainedPostThinning: FixedValue=15; Units=fruit/m2
          LinearInterpolationFunction WaterStress
            XYPairs: X=[0, 85]; Y=[1, 1]
            VariableReference XValue: VariableName=[AccumulatedWaterStress]
        DivideFunction FreshWtPerFruit
          VariableReference FreshWt: VariableName=[Fruit].FreshWt
          VariableReference Number: VariableName=[Fruit].Number
        DivideFunction VolumePerFruit
          VariableReference FreshWtPerFruit: VariableName=[Fruit].FreshWtPerFruit
          VariableReference Density: VariableName=[Fruit].Density
        MultiplyFunction FruitingBuds
          VariableReference RetainedPostThinning: VariableName=[Fruit].Number.RetainedPostThinning
          LinearInterpolationFunction WaterStress
            XYPairs: X=[0, 70, 90, 150, 200]; Y=[1, 1, 0.9, 0.6, 0]
            VariableReference XValue: VariableName=[AccumulatedWaterStress]
        ExpressionFunction Size: Expression=(6*[Fruit].VolumePerFruit/3.1415926)^(1/3)
      AccumulateFunction AccumulatedWaterStress: StartStageName=StartFullCanopy; EndStageName=StartLeafFall; ResetStageName=Dormant; FractionRemovedOnCut=0; FractionRemovedOnHarvest=0; FractionRemovedOnGraze=0; FractionRemovedOnPrune=1
        SubtractFunction StressIndex
          Constant One: FixedValue=1
          LinearInterpolationFunction FW
            XYPairs: X=[0.1, 0.9, 1.5]; Y=[0, 1, 1]
            VariableReference XValue: VariableName=[Leaf].Fw
      CompositeBiomass AboveGround: OrganNames=[Leaf, Trunk, Fruit]; IncludeLive=true; IncludeDead=true
      CompositeBiomass Total: OrganNames=[Leaf, Trunk, Fruit, Root]; IncludeLive=true; IncludeDead=true
      CompositeBiomass TotalLive: OrganNames=[Leaf, Trunk, Fruit, Root]; IncludeLive=true; IncludeDead=false
      CompositeBiomass TotalDead: OrganNames=[Leaf, Trunk, Fruit, Root]; IncludeLive=false; IncludeDead=true
      Constant MortalityRate: FixedValue=0
      Constant SeedMortalityRate: FixedValue=0
      Constant MaxPrunedHeight: FixedValue=0
      AddFunction Height
        MultiplyFunction CanopyBaseHeight
          Constant Maximum: FixedValue=0
          VariableReference RelativeAnnualDimension: VariableName=[STRUM].RelativeAnnualDimension
        MultiplyFunction PrunedCanopyDepth
          SubtractFunction Maximum
            VariableReference MaxPrunedHeight: VariableName=[STRUM].MaxPrunedHeight
            VariableReference MaxBaseHeight: VariableName=[STRUM].Height.CanopyBaseHeight.Maximum
          VariableReference RelativeAnnualDimension: VariableName=[STRUM].RelativeAnnualDimension
        MultiplyFunction SeasonalGrowth
          VariableReference RelativeSeasonalDimension: VariableName=[STRUM].RelativeSeasonalDimension
          Constant Maximum: FixedValue=100; Units=mm
          VariableReference RelativeAnnualDimension: VariableName=[STRUM].RelativeAnnualDimension
      AddFunction Width
        MultiplyFunction PrunedWidth
          VariableReference RelativeAnnualDimension: VariableName=[STRUM].RelativeAnnualDimension
          Constant Maximum: FixedValue=500; Units=mm
        MultiplyFunction SeasonalGrowth
          VariableReference RelativeSeasonalDimension: VariableName=[STRUM].RelativeSeasonalDimension
          Constant Maximum: FixedValue=500; Units=mm
      LinearInterpolationFunction RelativeAnnualDimension
        XYPairs: X=[0, 6]; Y=[0.4, 1]
        VariableReference XValue: VariableName=[Phenology].Age.YearDecimal
      StageBasedInterpolation RelativeSeasonalDimension: Values=[0, 0, 0, 0, 0.6, 1, 1, 1]; Proportional=true
    Report RowZoneReport: EventNames=[Clock].DoReport
      VariableNames:
        [Clock].Today
        [Row].STRUM.AccumulatedWaterStress
        [Row].STRUM.Arbitrator.DM.TotalPlantDemand
        [Row].STRUM.Arbitrator.DM.TotalPlantSupply
        [Row].STRUM.Arbitrator.Fn
        [Row].STRUM.Arbitrator.N.TotalPlantDemand
        [Row].STRUM.Arbitrator.N.TotalPlantSupply
        [Row].STRUM.Fruit.Allocated.StructuralWt
        [Row].STRUM.Fruit.DMDemand.Structural
        [Row].STRUM.Fruit.DryMatterPc
        [Row].STRUM.Fruit.FreshWtPerFruit
        [Row].STRUM.Fruit.FruitingBuds
        [Row].STRUM.Fruit.N
        [Row].STRUM.Fruit.NDemand.Structural
        [Row].STRUM.Fruit.Number
        [Row].STRUM.Fruit.Size
        [Row].STRUM.Fruit.VolumePerFruit
        [Row].STRUM.Fruit.Wt
        [Row].STRUM.Height.CanopyBaseHeight  + [Row].STRUM.Height.PrunedCanopyDepth + [Row].STRUM.Height.SeasonalGrowth
        [Row].STRUM.Height.CanopyBaseHeight  + [Row].STRUM.Height.PrunedCanopyDepth
        [Row].STRUM.Height.CanopyBaseHeight
        [Row].STRUM.Leaf.Area
        [Row].STRUM.Leaf.CoverGreen
        [Row].STRUM.Leaf.DMDemand.Structural
        [Row].STRUM.Leaf.Fn
        [Row].STRUM.Leaf.Fw
        [Row].STRUM.Leaf.Height
        [Row].STRUM.Leaf.LAI
        [Row].STRUM.Leaf.N
        [Row].STRUM.Leaf.NDemand.Structural
        [Row].STRUM.Leaf.PotentialEP
        [Row].STRUM.Leaf.RadiationIntercepted
        [Row].STRUM.Leaf.Transpiration
        [Row].STRUM.Leaf.WaterDemand
        [Row].STRUM.Leaf.Width
        [Row].STRUM.Leaf.Wt
        [Row].STRUM.Phenology.Age.YearDecimal
        [Row].STRUM.Phenology.Age.Years
        [Row].STRUM.Phenology.Stage
        [Row].STRUM.RelativeSeasonalDimension
        [Row].STRUM.Root.Depth
        [Row].STRUM.Root.DMDemand.Structural
        [Row].STRUM.Root.N
        [Row].STRUM.Root.NDemand.Structural
        [Row].STRUM.Root.Wt
        [Row].STRUM.Root.WaterUptakeByZone
        [Row].STRUM.Trunk.DMDemand.Structural
        [Row].STRUM.Trunk.EnergyBalance.CoverTotal
        [Row].STRUM.Trunk.EnergyBalance.DeadAreaIndex
        [Row].STRUM.Trunk.EnergyBalance.LAIDead
        [Row].STRUM.Trunk.EnergyBalance.RadiationInterceptedByDead
        [Row].STRUM.Trunk.N
        [Row].STRUM.Trunk.NDemand.Structural
        [Row].STRUM.Trunk.Wt
        [Row].STRUM.Width
        [Row].STRUM.Width.PrunedWidth + [Row].STRUM.Width.SeasonalGrowth
        [Row].STRUM.Width.PrunedWidth
    Report AlleyZoneReport: EventNames=[Clock].DoReport
      VariableNames:
        [Clock].Today
        [Alley].SPRUM.CoverGreen
        [Alley].SPRUM.Leaf.LAI
        [Alley].SPRUM.Leaf.Height
        [Alley].SPRUM.Root.Depth
        [Alley].SPRUM.Leaf.Transpiration
        [Alley].SPRUM.Leaf.RadiationIntercepted
        [Alley].SPRUM.Root.WaterUptakeByZone
    Report ReportBoth: EventNames=[Clock].DoReport
      VariableNames:
        [Clock].Today
        [Fertiliser].NitrogenApplied
        [Irrigation].IrrigationApplied
        [AgrgateZoneVariables].Script.PET
        [AgrgateZoneVariables].Script.ES
        [AgrgateZoneVariables].Script.ET
        [AgrgateZoneVariables].Script.FRadInt
        [AgrgateZoneVariables].Script.InterceptedRadiation
        [AgrgateZoneVariables].Script.TotRadn
        [AgrgateZoneVariables].Script.TWU
        [AgrgateZoneVariables].Script.PSW
        [Weather].Rain
        sum([Soil].Physical.DULmm) as ProfileDUL
        sum([Soil].Physical.LL15mm) as ProfileLL15
        [Weather].DaysSinceWinterSolstice
        [Weather].Radn
        sum([Soil].SoilWater.SWmm) as WholeProfileSWmm
        sum([Soil].Nutrient.MineralN)
        [Soil].OutputLayers.SW
        [Soil].SoilWater.Drainage
    Manager AgrgateZoneVariables
```csharp
using Models.Climate;
using System;
using Models.Core;
using Models.PMF;
using System.Collections.Generic;
using Models.Soils;
using APSIM.Shared.Utilities;
using Models.Zones;
using Models.PMF.Organs;

namespace Models
{
    [Serializable]
    public class Script : Model
    {
        [Link] private Weather weather;
        [Link(Type = LinkType.Scoped, ByName = true)] private OutputLayers outputLayers;
        private RectangularZone AlleyZone {get; set; }
        private RectangularZone RowZone {get; set;}
        private RectangularZone ThisZone {get; set;}
        private double AreaWidth {get; set;}
        private double TreeWidth {get; set;}
        public double TotRadn {get; set;}
        public double RadInt {get; set;}
        public double FRadInt {get; set;}
        public double ET {get; set;}
        public double ES {get; set;}
        public double PET {get; set;}
        public double InterceptedRadiation {get; set;}
        public double TreeRadInt {get; set;}
        public double TWU {get;set;}
        public double PSW {get;set;}

        [EventSubscribe("StartOfSimulation")]
        private void DoStartOfSimulation(object sender, EventArgs e)
        {
               
               ThisZone = this.Parent.Parent as RectangularZone;
               RowZone = this.Parent.Parent.Parent.FindInScope("Row") as RectangularZone;
               AlleyZone = (RectangularZone)this.Parent.Parent.Parent.FindInScope("Alley") as RectangularZone;
               double AlleyWidth = 0;
               if (AlleyZone != null)
                       AlleyWidth = AlleyZone.Width; 
               AreaWidth = AlleyWidth + RowZone.Width;
               TreeWidth = 0;
        }
        
        [EventSubscribe("DoReportCalculations")]
        private void OnDoReportCalculations(object sender, EventArgs e)
        {

            if (ThisZone.Name == "Row")
                {
                TreeRadInt = (double)RowZone.Get("STRUM.Leaf.RadiationIntercepted") + (double)RowZone.Get("STRUM.Trunk.EnergyBalance.RadiationInterceptedByDead");
                FRadInt = (TreeRadInt * RowZone.Width)/(weather.Radn * AreaWidth);
                InterceptedRadiation = (double)RowZone.Get("STRUM.Leaf.RadiationIntercepted");
                ET = (double)RowZone.Get("STRUM.Leaf.Transpiration") * RowZone.Width/AreaWidth;
                TreeWidth = (double)RowZone.Get("STRUM.Leaf.Width")/1000;
                TWU = (double)RowZone.Get("STRUM.Leaf.Transpiration")/(double)RowZone.Get("STRUM.Leaf.LAI") * 2.5; 
                }
            else if (ThisZone.Name == "Alley")
                {
                FRadInt = ((double)AlleyZone.Get("SPRUM.Leaf.RadiationIntercepted") * AlleyZone.Width)/(weather.Radn * AreaWidth);
                InterceptedRadiation = (double)AlleyZone.Get("SPRUM.Leaf.RadiationIntercepted");
                ET = (double)AlleyZone.Get("SPRUM.Leaf.Transpiration") * ThisZone.Width/AreaWidth;
                }
            TotRadn = weather.Radn * AreaWidth; 
            ES = (double)ThisZone.Get("Soil.SoilWater.Es") * ThisZone.Width/AreaWidth;
            double PETWidth = Math.Min(Math.Max(TreeWidth,ThisZone.Width),AreaWidth);
            PET = (double)ThisZone.Get("Soil.SoilWater.Eo") * PETWidth/AreaWidth;
            PSW = 0;
            for (int layer = 0; layer < outputLayers.Thickness.Length; layer++)
            {
                PSW += outputLayers.SWmm[layer];
            }
        }
    }
}
```
    StrumTreeInstance WashStateApple: AgeAtSimulationStart=5; YearsToMaxDimension=6; TrunkMassAtMaxDimension=12; BudBreakDAWS=100; StartFullCanopyDAWS=150; StartLeafFallDAWS=305; EndLeafFallDAWS=330; MaxRD=3000; RootThyNeighbour=true; CanopyBaseHeight=1000; MaxPrunedHeight=2800; SeasonalHeightGrowth=700; MaxPrunedWidth=1300; SeasonalWidthGrowth=300; RootNConc=0.01; LeafNConc=0.02; TrunkNConc=0.01; FruitNConc=0.02; ExtinctCoeff=0.8; MaxLAI=5; GSMax=0.004; R50=100; Number=40; Size=90; Density=0.75; DMC=0.16; DAWSMaxBloom=60; DAWSLinearGrowth=175; DAWSMaxSize=340
    Plant SPRUM: PlantType=SPRUM
      Memo TitlePage
        # SPRUM: the Simple Crop Resource Uptake Model

        _Hamish Brown and Rob Zyskowski, Plant and Food Research, New Zealand_

        This model has been built using the Plant Modelling Framework (PMF) of [brown_plant_2014] to simulate a range of different crops in simulations where water and nitrogen balance are of interest but a fully mechanistic plant model is not needed or is not available. It is a daily time step implementation of the crop model that is used on the Overseer nutrient balance model [Cichota_etal_2010].  It uses simple sigmoidal functions for estimating daily cover and biomass deltas to give realistic water and nitrogen demands. It does not simulate potential yield, this is specified as an input. Yield will be reduced below the specified potential yield if N or water supplies from the soil are insufficient to meet demand. The model has been paramaterised for simulating water and nitrogen balances of cropping rotations in New Zealand (where over 50 different crop types are grown and it is not feasible to produce full crop models for each of these).  Because of this the model is not as generically applicable as full APSIM crop models.   It may be adapted for other purposes and other crop types may be added but the user will need to keep in mind that because it is a simple model the the parameters might need changing for crops in different locations or for crops sown at different times of the year.  Some sensibility testing or validation is recommended before application in different sutuations.

        SPRUM has a simple phenology model which divides the crop growth into three main phases; a vegetative phase when the canopy is expanding, a reproductive phase when product is being formed and a senescing phase when the canopy is contracting.  SPRUM has 4 organ classes to represent different biomass components and the real biomass components that these classes represent changes from crop to crop:
           1. A Simple leaf class called <b>Stover</b> which represents the unharvested parts of the plant.  Generally, this represents the leaf and stem components of the crop but for crops where stem and leaf are part of the harvested product (e.g forages and leafy vegetables) than stover is the residual fraction of leaf and stem that is not harvested.
           2. A Generic organ class called <b>Product</b> which represents the plant parts that are harvested and removed from the field.  This could represent grain, fruits, tubers, leaf or stem depending on what sort of crop is being represented.
           3. A Root organ which extracts water and nitrogen from the soil for plant growth and returns biomass to the soil on harvest
           4. A Nodule organ which is only activated and fixes nitrogen for the legume crops.
        An Arbitrator is also included which determines the allocation of drymatter and nitrogen biomass between each of these organs.

        #Inclusion in APSIM simulations
        A SPRUM crop is included in a simulation the same as any other APSIM crop
         * The SPRUM object needs to be dragged or copied from the Crop folder in the tool box into the field of your simulation.
         * It is then planted with a sowing rule
        ~~~
        SPRUM.Sow(cultivar: Wheat_Autumn, population: 1, depth: 10, rowSpacing: 150);
        ~~~
          * Note that SPRUM has no notion of population or rowSpacing but these parameters are required by the Sow method so filler values are provided
          * To specify an expected Expected Yield that differs to the defalt value provided, included the following code in a manager script to be executed on the day of sowing.
        ~~~
         zone.Set("[SPRUM].Residue.ExpectedYield.Value()", ResetValue);
        ~~~
        * SPRUM can be Harvested, Cut, Grazed and Pruned like other crops.  Defalt proportions of the biomass in each organ are removed from the sysem and/or added to the fields residue pools.  Note that defalt removal fraction for product on harvest is 0 (becaue it is represented with a generic organ) so more appropriate removal fractions should be sepcified in a manager script as follows:
        ~~~
        [EventSubscribe("Commencing")]
        private void OnSimulationCommencing(object sender, EventArgs e)
        {
          Remove = new RemovalFractions(SPRUM.Organs);
        }
        [EventSubscribe("DoManagement")]
        private void OnDoManagement(object sender, EventArgs e)
        {
          if (Clock.Today.Date == HarvestDate2)
          {
            Remove.SetFractionLiveToRemove("Product", 1.0);
            Remove.SetFractionLiveToRemove("Stover", 0.05);
            Remove.SetFractionLiveToResidue("Stover",0.95)
            SPRUM.Harvest(Remove);
            SPRUM.EndCrop();
          }
        }
        ~~~
        * A Remove class as shown above can be sent with Harvest, Cut, Graze and Prune events to specificy the proportions of removals.
         * Once a crop has been ended the field is open to plant another crop using another APSIM crop model or sowing another SPRUM crop.
      Phenology
        SubDailyInterpolation ThermalTime: agregationMethod=0
          Memo Description
            Progression through each of the phenological stages is driven by thermal time.  As temperature increases from zero to 30 degrees, development acelerates and then slows down again above 30 degress
          XYPairs Response: X=[1, 15, 30, 40]; Y=[0, 10, 25, 0]
          ThreeHourAirTemperature InterpolationMethod
        Memo Description1
          As ThermalTime accumulates the crop progresses through the following phases:
        StartPhase ReStart: Start=Grazing; End=PostGraze; IsEmerged=true
        GenericPhase CanopyExpanding: Start=PostGraze; End=CanopyClosure; IsEmerged=true
          Memo Description
            During this phase the plant only partitions biomass to Root and Stover (leaf and stem) Organs
          Constant Target: FixedValue=150; Units=<sup>o</sup>Cd
          VariableReference Progression: VariableName=[Phenology].ThermalTime
        GenericPhase FullCanopy: Start=CanopyClosure; End=Grazing; IsEmerged=true
          Memo Description
            During this phase the plant is partitioning biomass to Root, Stover and Product organs.
          Constant Target: FixedValue=151; Units=<sup>o</sup>Cd
          VariableReference Progression: VariableName=[Phenology].ThermalTime
        GrazeAndRewind Graze: Start=Grazing; IsEmerged=true; PhaseNameToGoto=ReStart
      OrganArbitrator Arbitrator: same as Replacements.STRUM.Arbitrator
      GenericOrgan Residue: IsAboveGround=true
        Memo Description
          It is the biomass that is removed from the crop at harvest and may include grain, root, leaf, stem, pod or any other organ type depending on the type of crop and how it is harvested.
        Constant MaximumNConc: FixedValue=0.01
        Constant MinimumNConc: FixedValue=0.005
        Constant NReallocationFactor: FixedValue=0
        Constant RemobilisationCost: FixedValue=0
        Constant SenescenceRate: FixedValue=0; Units=/d
        BiomassRemoval BiomassRemovalDefaults: HarvestFractionLiveToRemove=0; HarvestFractionDeadToRemove=0; HarvestFractionLiveToResidue=0.5; HarvestFractionDeadToResidue=0.5
        Constant DetachmentRateFunction: FixedValue=0; Units=/d
        Constant MaintenanceRespirationFunction: FixedValue=0; Units=0-1
        Constant DMConversionEfficiency: FixedValue=1; Units=0-1
        Constant NRetranslocationFactor: FixedValue=0
        Constant NitrogenDemandSwitch: FixedValue=1
        Constant DMReallocationFactor: FixedValue=0
        Constant DMRetranslocationFactor: FixedValue=0
        VariableReference CriticalNConc: VariableName=[Residue].MinimumNConc
        Constant CarbonConcentration: FixedValue=0.4
        NutrientDemandFunctions DMDemands
          MultiplyFunction Structural
            PartitionFractionDemandFunction DMDemandFunction
              Constant PartitionFraction: FixedValue=0.15
                Memo Description
                  The proportion of total biomass in harvested product
            Constant StructuralFraction: FixedValue=1; Units=0-1
          Constant Metabolic: FixedValue=0
          StorageDMDemandFunction Storage
            SubtractFunction StorageFraction
              Constant One: FixedValue=1
              VariableReference StructuralFraction: VariableName=[Residue].DMDemands.Structural.StructuralFraction
          Constant QStructuralPriority: FixedValue=1
          Constant QMetabolicPriority: FixedValue=1
          Constant QStoragePriority: FixedValue=1
        NutrientDemandFunctions NDemands
          MultiplyFunction Structural
            VariableReference MinNconc: VariableName=[Residue].minimumNconc
            VariableReference PotentialDMAllocation: VariableName=[Residue].potentialDMAllocation.Structural
          MultiplyFunction Metabolic
            SubtractFunction MetabolicNconc
              VariableReference CritNconc: VariableName=[Residue].criticalNConc
              VariableReference MinNconc: VariableName=[Residue].minimumNconc
            VariableReference PotentialDMAllocation: VariableName=[Residue].potentialDMAllocation.Structural
          StorageNDemandFunction Storage
            VariableReference NitrogenDemandSwitch: VariableName=[Residue].nitrogenDemandSwitch
            VariableReference MaxNconc: VariableName=[Residue].maximumNconc
          Constant QStructuralPriority: FixedValue=1
          Constant QMetabolicPriority: FixedValue=1
          Constant QStoragePriority: FixedValue=1
        RetranslocateNonStructural RetranslocateNitrogen
        NutrientPoolFunctions InitialWt: same as Replacements.STRUM.Fruit.InitialWt
        Constant Photosynthesis: FixedValue=0
        VariableReference initialNConcFunction: VariableName=[Residue].MaximumNConc
      SimpleLeaf Leaf: Albedo=0.18; Gsmax350=0.01; R50=150; LeafInitialisationStage=PostGraze; Height=0; BaseHeight=0; Width=0; FRGR=0; PotentialEP=0; WaterDemand=0; KDead=0; LAIDead=0
        Memo Description
          Stover represents any part of the crop that is not removed at harvest (i.e not part of the product).
        Constant StomatalConductanceCO2Modifier: FixedValue=1
        Constant NReallocationFactor: FixedValue=0
        Constant RemobilisationCost: FixedValue=0
        Constant SenescenceRate: FixedValue=0
        Constant InitialWt: FixedValue=0; Units=g/m^2
        Constant DetachmentRate: FixedValue=0; Units=/d
        Constant LaiDead: FixedValue=0; Units=m^2/m^2
        MultiplyFunction Photosynthesis
          MultiplyFunction Potential
            Constant g_per_oCd: FixedValue=1.1
            VariableReference Cover: VariableName=[Leaf].Cover
            SubDailyInterpolation ThermalTime: agregationMethod=0
              Memo Description
                Progression through each of the phenological stages is driven by thermal time.  As temperature increases from zero to 30 degrees, development acelerates and then slows down again above 30 degress
              XYPairs Response: X=[5, 30, 40]; Y=[0, 25, 0]
              ThreeHourAirTemperature InterpolationMethod
          LinearInterpolationFunction WaterStressFactor
            XYPairs: X=[0, 0, 0.5, 1]; Y=[0, 0, 1, 1]
            VariableReference XValue: VariableName=[Leaf].Fw
        MinimumFunction FRGR
          SubDailyInterpolation FRGRFunctionTemp: same as Replacements.STRUM.Leaf.FRGR
        SigmoidFunction Cover
          Constant Ymax: FixedValue=0.97
          VariableReference XValue: VariableName=[Phenology].AccumulatedTT
          Constant Xo: FixedValue=0
          Constant b: FixedValue=50
        Constant ExtinctionCoefficient: FixedValue=0.5
          Memo Description
            The extinction coefficient is used to calculate a LAI value (needed by MicroClimate) from the canopy cover
        LinearInterpolationFunction HeightFunction
          XYPairs: X=[1, 3]; Y=[100, 300]
          VariableReference XValue: VariableName=[Phenology].Stage
        Constant MaximumNConc: FixedValue=0.05
        Constant MinimumNConc: FixedValue=0.02
        BiomassRemoval BiomassRemovalDefaults: HarvestFractionLiveToRemove=1; HarvestFractionDeadToRemove=1; HarvestFractionLiveToResidue=0; HarvestFractionDeadToResidue=0
        Constant MaintenanceRespiration: FixedValue=0; Units=0-1
        Constant DMConversionEfficiency: FixedValue=1; Units=0-1
        Constant NRetranslocationFactor: FixedValue=0
        Constant DMReallocationFactor: FixedValue=0
        Constant DMRetranslocationFactor: FixedValue=0
        VariableReference CriticalNConc: VariableName=[Leaf].MinimumNConc
        Constant CarbonConcentration: FixedValue=0.4
        NutrientDemandFunctions DMDemands
          MultiplyFunction Structural
            PartitionFractionDemandFunction DMDemandFunction
              Memo Description
                DM demand is based on a simple partitioning coefficients.  At harvest the biomass partitioned to the stover = TotalDM * (1 - RootProportion) * (1 - Harvest index).  However the partitioningFraction is more complicated that this as it partitions more biomass to the stover in the CanopyExpanding Phase and less in the Yield increasing phase to give realistic patterns of accumulation of biomass in the Stover and Product over the duration of the crop
              Constant PartitionFraction: FixedValue=0.75
            Constant StructuralFraction: FixedValue=1; Units=0-1
          Constant Metabolic: FixedValue=0
          StorageDMDemandFunction Storage
            SubtractFunction StorageFraction
              Constant One: FixedValue=1
              VariableReference StructuralFraction: VariableName=[Leaf].DMDemands.Structural.StructuralFraction
          Constant QStructuralPriority: FixedValue=1
          Constant QMetabolicPriority: FixedValue=1
          Constant QStoragePriority: FixedValue=1
        NutrientDemandFunctions NDemands
          MultiplyFunction Structural
            VariableReference MinNconc: VariableName=[Leaf].minimumNconc
            VariableReference PotentialDMAllocation: VariableName=[Leaf].potentialDMAllocation.Structural
          MultiplyFunction Metabolic
            SubtractFunction MetabolicNconc
              VariableReference CritNconc: VariableName=[Leaf].criticalNConc
              VariableReference MinNconc: VariableName=[Leaf].minimumNconc
            VariableReference PotentialDMAllocation: VariableName=[Leaf].potentialDMAllocation.Structural
          StorageNDemandFunction Storage
            VariableReference NitrogenDemandSwitch: VariableName=[Leaf].nitrogenDemandSwitch
            VariableReference MaxNconc: VariableName=[Leaf].maximumNconc
          Constant QStructuralPriority: FixedValue=1
          Constant QMetabolicPriority: FixedValue=1
          Constant QStoragePriority: FixedValue=1
        Constant NitrogenDemandSwitch: FixedValue=1
      Nodule
        Memo Description
          The nodule organ is unparameterised and simply has a switch that is turned on for legume crops (so they can fix what ever N the crop demands) and switched off for non legume crops (which fix no N)
        Constant MaximumNConc: FixedValue=0
        Constant RemobilisationCost: FixedValue=0
        Constant MinimumNConc: FixedValue=0
        Constant NReallocationFactor: FixedValue=0
        Constant SenescenceRate: FixedValue=0
        MultiplyFunction FixationRate
          Constant MaximumFixation: FixedValue=0.03; Units=g N / g Photosynthesis
          VariableReference DailyPhotosynthesis: VariableName=[Leaf].Photosynthesis
          VariableReference LegumePropn: VariableName=[SPRUM].LegumePropn
        BiomassRemoval BiomassRemovalDefaults: HarvestFractionLiveToRemove=0; HarvestFractionDeadToRemove=0; HarvestFractionLiveToResidue=0; HarvestFractionDeadToResidue=0
        Constant InitialWtFunction: FixedValue=0; Units=g/m^2
        Constant DetachmentRateFunction: FixedValue=0; Units=/d
        Constant FixationMetabolicCost: FixedValue=0
        Constant MaintenanceRespirationFunction: FixedValue=0; Units=0-1
        Constant DMConversionEfficiency: FixedValue=1; Units=0-1
        Constant NRetranslocationFactor: FixedValue=0
        Constant NitrogenDemandSwitch: FixedValue=1
        Constant DMReallocationFactor: FixedValue=0
        Constant DMRetranslocationFactor: FixedValue=0
        VariableReference CriticalNConc: VariableName=[Nodule].MinimumNConc
        Constant CarbonConcentration: FixedValue=0.4
        NutrientPoolFunctions DMDemands
          MultiplyFunction Structural
            Constant DMDemandFunction: FixedValue=0; Units=g/m^2
            Constant StructuralFraction: FixedValue=1; Units=0-1
          Constant Metabolic: FixedValue=0
          StorageDMDemandFunction Storage
            SubtractFunction StorageFraction
              Constant One: FixedValue=1
              VariableReference StructuralFraction: VariableName=[Nodule].DMDemands.Structural.StructuralFraction
        NutrientPoolFunctions NDemands
          MultiplyFunction Structural
            VariableReference MinNconc: VariableName=[Nodule].minimumNconc
            VariableReference PotentialDMAllocation: VariableName=[Nodule].potentialDMAllocation.Structural
          MultiplyFunction Metabolic
            SubtractFunction MetabolicNconc
              VariableReference CritNconc: VariableName=[Nodule].criticalNConc
              VariableReference MinNconc: VariableName=[Nodule].minimumNconc
            VariableReference PotentialDMAllocation: VariableName=[Nodule].potentialDMAllocation.Structural
          StorageNDemandFunction Storage
            VariableReference NitrogenDemandSwitch: VariableName=[Nodule].nitrogenDemandSwitch
            VariableReference MaxNconc: VariableName=[Nodule].maximumNconc
      Root: GrowthRespiration=0; MaintenanceRespiration=0
        RootShapeCylinder RootShape
        Memo Description
          The root organ demands and is partitioned N and DM and its depth increases through time to provide a water uptake supply
        Constant DMConversionEfficiency: FixedValue=1; Units=0-1
        Constant RemobilisationCost: FixedValue=0
        KLModiferVsDepthFunction klModifier
          VariableReference LayerDepth: VariableName=[Physical].DepthMidPoints
          VariableReference MaximumRootDepth: VariableName=[Root].MaximumRootDepth
        Constant SoilWaterEffect: FixedValue=1
        Constant MaxDailyNUptake: FixedValue=12
        MultiplyFunction SenescenceRate: same as Replacements.STRUM.Root.SenescenceRate
        Constant MaximumNConc: FixedValue=0.009
        Constant MinimumNConc: FixedValue=0.009
        Constant NitrogenDemandSwitch: FixedValue=1
        Constant MaximumRootDepth: FixedValue=1500
        Constant RootProportion: FixedValue=0.1
          Memo Description
            This is the proportion of total biomass that is paritioned into the roots and is used to set the partitioning fraction for the roots
        BiomassRemoval BiomassRemovalDefaults: HarvestFractionLiveToRemove=0; HarvestFractionDeadToRemove=0; HarvestFractionLiveToResidue=0.2; HarvestFractionDeadToResidue=0
        Constant SpecificRootLength: FixedValue=40; Units=m/g
        LinearInterpolationFunction KNO3
          XYPairs: X=[0, 0.003]; Y=[0.02, 0.02]
          VariableReference XValue: VariableName=[Root].LengthDensity
        LinearInterpolationFunction KNH4
          XYPairs: X=[0, 0.003]; Y=[0, 0]
          VariableReference XValue: VariableName=[Root].LengthDensity
        LinearInterpolationFunction NUptakeSWFactor
          XYPairs: X=[0, 1]; Y=[0, 1]
          VariableReference XValue: VariableName=[Root].RWC
        Constant MaintenanceRespirationFunction: FixedValue=0
        Constant CarbonConcentration: FixedValue=0.4
        NutrientDemandFunctions DMDemands
          MultiplyFunction Structural
            PartitionFractionDemandFunction DMDemandFunction
              Constant PartitionFraction: FixedValue=0.1
            Constant StructuralFraction: FixedValue=1
          Constant Metabolic: FixedValue=0
          StorageDMDemandFunction Storage
            SubtractFunction StorageFraction
              Constant One: FixedValue=1
              VariableReference StructuralFraction: VariableName=[Root].DMDemands.Structural.StructuralFraction
          Constant QStructuralPriority: FixedValue=1
          Constant QMetabolicPriority: FixedValue=1
          Constant QStoragePriority: FixedValue=1
        NutrientDemandFunctions NDemands
          MultiplyFunction Structural
            VariableReference MinNconc: VariableName=[Root].minimumNconc
            VariableReference PotentialDMAllocation: VariableName=[Root].potentialDMAllocation.Structural
          MultiplyFunction Metabolic
            SubtractFunction MetabolicNconc
              VariableReference CritNconc: VariableName=[Root].criticalNConc
              VariableReference MinNconc: VariableName=[Root].minimumNconc
            VariableReference PotentialDMAllocation: VariableName=[Root].potentialDMAllocation.Structural
          StorageNDemandFunction Storage
            VariableReference NitrogenDemandSwitch: VariableName=[Root].nitrogenDemandSwitch
            VariableReference MaxNconc: VariableName=[Root].maximumNconc
          Constant QStructuralPriority: FixedValue=1
          Constant QMetabolicPriority: FixedValue=1
          Constant QStoragePriority: FixedValue=1
        VariableReference CriticalNConc: VariableName=[Root].MinimumNConc
        NutrientPoolFunctions InitialWt
          Constant Structural: FixedValue=0.2; Units=g/plant
          Constant Metabolic: FixedValue=0
          Constant Storage: FixedValue=0
        Constant RootDepthStressFactor: FixedValue=1
        Constant RootFrontVelocity: FixedValue=0
      CompositeBiomass Total: OrganNames=[Leaf, Residue, Root]; IncludeLive=true; IncludeDead=true
      CompositeBiomass AboveGround: OrganNames=[Leaf, Residue]; IncludeLive=true; IncludeDead=true
        Memo
          The AboveGround composite biomass object includes Stover and Product organs.
      Cultivar Pasture (disabled)
      Constant MortalityRate: FixedValue=0
      Constant LegumePropn: FixedValue=1
      Constant SeedMortalityRate: FixedValue=0
  DataStore
    ExcelInput: FileNames=[AllObs.xlsx]; SheetNames=[Observed]
    PredictedObserved: PredictedTableName=RowZoneReport; ObservedTableName=Observed; FieldNameUsedForMatch=SimulationName; FieldName2UsedForMatch=Zone; FieldName3UsedForMatch=Clock.Today; AllColumns=false
    PredictedObserved DrainagePO (disabled): PredictedTableName=Drainage; ObservedTableName=Observed; FieldNameUsedForMatch=SimulationName; FieldName2UsedForMatch=Zone; FieldName3UsedForMatch=Clock.Today; AllColumns=false
  Folder PatternTest
    Simulation PatternsTest
      Clock: Start=2000-07-21; End=2011-07-01
      Summary SummaryFile
      Weather: FileName=Whakatu.met
      MicroClimate: a_interception=0; b_interception=1; c_interception=0; d_interception=0; SoilHeatFluxFraction=0.4; MinimumHeightDiffForNewLayer=0; NightInterceptionFraction=0.5; ReferenceHeight=2
      SoilArbitrator Soil Arbitrator
      RectangularZone Row: Length=100; Width=1.3; Slope=0; AspectAngle=0; Altitude=50
        Report RowZoneReport: EventNames=[Clock].DoReport
        Report ReportBoth: EventNames=[Clock].DoReport
        Soil: Latitude=0; Longitude=0
          LayerStructure: Thickness=[200, 200, 200, 200, 200, 200, 300, 300, 400, 800]
          Chemical: Thickness=[100, 200, 300, 300, 300, 300]; PH=[6.6, 6.2, 5.7, 5.5, 5.5, 5.5]; PHUnits=Water
          Water: Thickness=[300, 300, 300, 300, 300, 300, 1200]; InitialValues=[0.42, 0.41, 0.5, 0.46, 0.45, 0.43, 0.43]; InitialPAWmm=702; RelativeTo=LL15; FilledFromTop=false
          WaterBalance SoilWater: SummerDate=1-Nov; SummerU=9; SummerCona=4.4; WinterDate=1-Apr; WinterU=9; WinterCona=4.4; DiffusConst=88; DiffusSlope=35.4; Salb=0.3; CN2Bare=68; CNRed=20; CNCov=0.8; DischargeWidth=0; CatchmentArea=0; PSIDul=-100
            Thickness  SWCON  KLAT
            300        0.55   0
            300        0.55   0
            300        0.55   0
            300        0.55   0
            300        0.1    0
            300        0.02   0
            400        0.02   0
            800        0      0
          Organic: FOMCNRatio=30; CarbonUnits=Total
            Thickness  Carbon  SoilCNRatio  FBiom  FInert  FOM
            100        1.82    11.5         0.025  0.3     1243.931
            200        1.47    11.5         0.025  0.4     833.832
            300        1.2     11.5         0.015  0.75    457.617
            300        1.03    11.5         0.01   0.9     251.145
            300        0.47    11.5         0.01   0.96    137.831
            300        0.47    11.5         0.01   0.96    75.644
          CERESSoilTemperature Temperature
          OutputLayers: Thickness=[300, 300, 300, 300, 300, 300]
          Solute NO3: Thickness=[100, 200, 300, 300, 300, 300]; InitialValues=[217, 15, 1.66667, 1.66667, 0, 0]; InitialValuesUnits=ppm; WaterTableConcentration=0; D0=0; DepthConstant=0; MaxDepthSoluteAccessible=0; RunoffEffectivenessAtMovingSolute=0; MaxEffectiveRunoff=0
          Solute NH4: Thickness=[100, 200, 300, 300, 300, 300]; InitialValues=[0, 0, 0, 0, 0, 0]; InitialValuesUnits=ppm; WaterTableConcentration=0; D0=0; DepthConstant=0; MaxDepthSoluteAccessible=0; RunoffEffectivenessAtMovingSolute=0; MaxEffectiveRunoff=0
          Solute Urea: Thickness=[100, 200, 300, 300, 300, 300]; InitialValues=[0, 0, 0, 0, 0, 0]; InitialValuesUnits=kg/ha; WaterTableConcentration=0; D0=0; DepthConstant=0; MaxDepthSoluteAccessible=0; RunoffEffectivenessAtMovingSolute=0; MaxEffectiveRunoff=0
          Physical
            Thickness  BD  AirDry  LL15  DUL   SAT   KS
            300        1   0.2     0.2   0.4   0.5   100
            300        1   0.2     0.2   0.4   0.5   100
            300        1   0.25    0.25  0.4   0.5   50
            300        1   0.2     0.2   0.46  0.5   40
            300        1   0.2     0.2   0.45  0.5   40
            300        1   0.2     0.2   0.43  0.53  40
            1200       1   0.2     0.2   0.43  0.53  40
            SoilCrop STRUMSoil: LL=[0.2, 0.2, 0.2, 0.2, 0.2, 0.2, 0.2]; KL=[1, 1, 1, 1, 1, 1, 1]; XF=[1, 1, 1, 1, 1, 1, 1]
            SoilCrop SPRUMSoil: LL=[0.2, 0.2, 0.2, 0.2, 0.2, 0.2, 0.2]; KL=[0.11, 0.11, 0.11, 0.11, 0.11, 0.11, 0.11]; XF=[1, 1, 1, 1, 1, 1, 1]
          Nutrient
        SurfaceOrganicMatter: InitialResidueName=wheat_stubble; InitialResidueType=wheat; InitialResidueMass=500; InitialStandingFraction=0; InitialCPR=0; InitialCNR=100
        Plant STRUM
        StrumTreeInstance Apple: AgeAtSimulationStart=1; YearsToMaxDimension=6; TrunkMassAtMaxDimension=12; BudBreakDAWS=70; StartFullCanopyDAWS=125; StartLeafFallDAWS=305; EndLeafFallDAWS=330; MaxRD=3000; RootThyNeighbour=true; CanopyBaseHeight=1000; MaxPrunedHeight=2500; SeasonalHeightGrowth=800; MaxPrunedWidth=1200; SeasonalWidthGrowth=600; RootNConc=0.01; LeafNConc=0.02; TrunkNConc=0.01; FruitNConc=0.02; ExtinctCoeff=0.6; MaxLAI=6; GSMax=0.004; R50=100; Number=50; Size=70; Density=0.75; DMC=0.14; DAWSMaxBloom=60; DAWSLinearGrowth=150; DAWSMaxSize=300
        Fertiliser
        Manager SetupTreeRootZones
          UseExtraZone = True
```csharp
using Models.Soils;
using Models.Functions;
using APSIM.Shared.Utilities;
using System.Xml.Serialization;
using Models;
using Models.PMF;
using System.Text;
using System.Collections.Generic;
using Models.Core;
using System;
using Models.PMF.Organs;

namespace Models
{
    [Serializable] 
    public class Script : Model
    {
        [Link] private Plant STRUM;
        [Link] private Clock Clock;
        [Link] private Zone zone;
        [Link(Type = LinkType.Path, Path = "[STRUM].Root")]
        private Root root;

        [Description("Use extra root zone")]
        public bool UseExtraZone { get; set; }

        
        [EventSubscribe("StartOfSimulation")]
        private void OnSimulationCommencing(object sender, EventArgs e)
        {
            if (UseExtraZone)
            {
            root.ZoneNamesToGrowRootsIn.Add("Alley");
            root.ZoneRootDepths.Add(2600);
NutrientPoolFunctions InitialDM = new NutrientPoolFunctions();
Constant InitStruct = new Constant();
InitStruct.FixedValue = 10;
InitialDM.Structural = InitStruct;
Constant InitMetab = new Constant();
InitMetab.FixedValue = 0;
InitialDM.Metabolic = InitMetab;
Constant InitStor = new Constant();
InitStor.FixedValue = 0;
InitialDM.Storage = InitStor;
            root.ZoneInitialDM.Add(InitialDM);

            }
        }
    }
}
```
        Manager AgrgateZoneVariables
```csharp
using Models.Climate;
using System;
using Models.Core;
using Models.PMF;
using System.Collections.Generic;
using Models.Soils;
using APSIM.Shared.Utilities;
using Models.Zones;
using Models.PMF.Organs;

namespace Models
{
    [Serializable]
    public class Script : Model
    {
        
    }
}
```
        Irrigation
        Manager AutomaticIrrigation
          Irrigate = True
          Season_Start = 1-Sep
          Season_End = 30-Apr
          Season_Allocation = 100000
          Refull_Frac = 0.95
          Trigger_Frac = 0.8
          Return_days = 3
          Maximum_Irrigation_Amount = 40
          Top_Depth = 600
```csharp
using Newtonsoft.Json;
using Models.PMF.Phen;
using APSIM.Shared.Utilities;
using System.Xml.Serialization;
using Models.Soils;
using Models.PMF;
using Models.Core;
using System;
using Models.PMF.Organs;
using Models.Interfaces;

        
namespace Models
{
    [Serializable] 
    [System.Xml.Serialization.XmlInclude(typeof(Model))]
    public class Script : Model
    {
        [Link] private ISummary summary;
        [Link] private Irrigation Irrigation;
        [Link] private Clock Clock;
        [Link] private Soil Soil;
        [Link] private Plant SCRUM;
        [Link(Type = LinkType.Path, Path = "[STRUM].Root")]
        private Root root;
        [Link]
        private IPhysical soilPhysical;
        [Link]
        private ISoilWater waterBalance;
        //Communication to other modules
       
        //User inputs from properties tab
        [Description("Irrigation on (yes or no)")]
        public bool Irrigate { get; set; }
        [Description("SeasonStart (dd-MMM)")]
        public string Season_Start { get; set; }
        [Description("SeasonEnd (dd-MMM)")]
        public string Season_End { get; set; }
        [Description("Season Allocation (mm)")]
        public double Season_Allocation { get; set; }
        [Description("% PAWC to refill soil to (0-1)")]
        public double Refull_Frac { get; set; }
        [Description("% PAWC to trigger irrigation (0-1)")]
        public double Trigger_Frac { get; set; }
        [Description("Minimum days for irrigation to return")]
        public double Return_days { get; set; }
        [Description("Maximum irrigation application (mm)")]
        public double Maximum_Irrigation_Amount { get; set; }
        [Description("Depth to calculate PAWC (mm)")]
        public double Top_Depth { get; set; }
       
        //Class members
        [JsonIgnore] private bool IrrigationIsAvailable { get; set; }
        [JsonIgnore] public bool SeasonIsOpen { get; set; }
        [JsonIgnore] private bool CropIsActive { get; set; }
        [JsonIgnore] private bool IrrigatorIsAvailable { get; set; }
        [JsonIgnore] private bool SoilIsDry { get; set; }
        [JsonIgnore] public double Top_DUL { get; set; }
        [JsonIgnore] public double Top_Refull { get; set; }
        [JsonIgnore] public double Top_Trigger { get; set; }
        [JsonIgnore] public double Top_LL { get; set; }
        [JsonIgnore] public double Top_SW { get; set; }
        [JsonIgnore] public double Accumulated_depth { get; set; }
        [JsonIgnore] public double Days_since_irrigation { get; set; }
        [JsonIgnore] public double Amount_to_apply { get; set; }
        [JsonIgnore] public double Season_Application { get; set; }
        
        //Variables for date logic testing
        [JsonIgnore] public string StartString { get; set; }
        [JsonIgnore] public string EndString { get; set; }
        [JsonIgnore] public DateTime StartDate { get; set; }
        [JsonIgnore] public DateTime EndDate { get; set; }
        [JsonIgnore] public int TodayYear { get; set; }
        [JsonIgnore] public int TodayMonth { get; set; }
        [JsonIgnore] public int StartMonth { get; set; }
        [JsonIgnore] public int EndMonth { get; set; }
        [JsonIgnore] public int TodayDay { get; set; }
        [JsonIgnore] public int StartDay { get; set; }
        [JsonIgnore] public int EndDay { get; set; }
       
    
        //Calculate static soil variables
        [EventSubscribe("StartOfSimulation")]
        private void OnStartOfSimulation(object sender, EventArgs e)
        {   
            //Calculated soil water variables
            Accumulated_depth = 0;
            for (int layer = 0; Accumulated_depth < Top_Depth; layer++)
            {
                Top_LL += soilPhysical.LL15mm[layer];
                Top_DUL += soilPhysical.DULmm[layer];
                Accumulated_depth += soilPhysical.Thickness[layer];
            }
            Top_Refull = Top_LL + (Top_DUL - Top_LL) * Refull_Frac;
        }
       
      
        //Determine daily requirement for irrigation
        [EventSubscribe("StartOfDay")]
        private void OnStartOfDay(object sender, EventArgs e)
        { 
            //Can we irrigate?
            IrrigationIsAvailable = false; 
            if (Irrigate)
                IrrigationIsAvailable = true; 
    
            //Are we Allowed to Irrigate?
            TodayYear = Clock.Today.Year;
            StartString = Season_Start + "-" + TodayYear.ToString();
            EndString = Season_End + "-" + TodayYear.ToString();
            StartDate = DateTime.Parse(StartString);
            EndDate = DateTime.Parse(EndString);
            TodayMonth = Clock.Today.Month;
            TodayDay = Clock.Today.Day;
            StartDay = StartDate.Day;
            StartMonth = StartDate.Month;
            EndDay = EndDate.Day;
            EndMonth = EndDate.Month;
          
            SeasonIsOpen = false;
            //if we are in the spring and after the start date then yes
            if ((Clock.Today.Month > 6) && (Clock.Today >= StartDate))
                SeasonIsOpen = true;
            //if we are in the autumn and before the end date then yes
            if ((Clock.Today.Month <= 6) && (Clock.Today <= EndDate))
                SeasonIsOpen = true;
          
            //Is there a crop in the ground that needs irrigation?
            //CropIsActive = false;
            //if ((phenology.Stage >= 3.0) && (phenology.Stage < 6.0))
            CropIsActive = true;
          
            //Is the irrigator available?
            IrrigatorIsAvailable = false;
            Days_since_irrigation += 1;
            if (Days_since_irrigation >= Return_days)
                IrrigatorIsAvailable = true;
          
            //Is the soil dry enough to require irrigation?
            SoilIsDry = false;
            double CurrentRootDepth = 0;
            double RootDepth = root.Depth;
            CurrentRootDepth = Math.Max(RootDepth, CurrentRootDepth);
          
            double RelativeRootDepth = Math.Min(1.0, CurrentRootDepth / Top_Depth);
            Top_Trigger = Math.Min(Top_Refull, Top_DUL - (Top_DUL - Top_LL) * RelativeRootDepth * (1 - Trigger_Frac)); 
          
            Accumulated_depth = 0;
            Top_SW = 0;
            for (int layer = 0; Accumulated_depth < Top_Depth; layer++)
            {
                Top_SW += waterBalance.SWmm[layer];
                Accumulated_depth += soilPhysical.Thickness[layer];
            }
            if (Top_SW <= Top_Trigger)
                SoilIsDry = true;
                
            //Lets bloody well irrigate then!!!!
            if ((IrrigationIsAvailable) && (SeasonIsOpen) && (CropIsActive) && (IrrigatorIsAvailable) && (SoilIsDry)) //The conditions are rife for irrigation
            {
                Amount_to_apply = Math.Min(Top_Refull - Top_SW, Maximum_Irrigation_Amount);
                Amount_to_apply = Math.Min(Amount_to_apply, Season_Allocation - Season_Application); 
                Amount_to_apply = Math.Max(Amount_to_apply, 0.0);
                Irrigation.Apply(Amount_to_apply);
                Days_since_irrigation = 0;
                Season_Application += Amount_to_apply;
                summary.WriteMessage(this, "Automatic Irrigation", MessageType.Diagnostic);
            
            }
        }
    }
}
```
        Manager AutomaticFertiliser
          Season_Start = 1-Aug
          Season_End = 30-Apr
          Season_Allocation = 100000
          TriggerN = 50
          NApplicationAmount = 25
          Return_days = 3
          Top_Depth = 300
          Fertilise = True
```csharp
using Newtonsoft.Json;
using Models.PMF.Phen;
using Models.Soils.Nutrients;
using Models.Interfaces;
using APSIM.Shared.Utilities;
using Models.PMF;
using System.Xml.Serialization;
using Models.Soils;
using Models.Core;
using System;
using Models.PMF.Organs;

        
namespace Models
{
    [Serializable] 
    [System.Xml.Serialization.XmlInclude(typeof(Model))]
    public class Script : Model
    {
        [Link] private ISummary summary;
        [Link] private Fertiliser Fertiliser;
        [Link] private Clock Clock;
        [Link] private Plant SCRUM;
        [Link(ByName = true)]
        private ISolute NO3;
        [Link] private Soils.Soil Soil;
        [Link(Type = LinkType.Path, Path = "[STRUM].Root")]
        private Root root;
        [Link(Type = LinkType.Path, Path = "[STRUM].Phenology")]
        private Phenology phenology;
        [Link]
        private IPhysical soilPhysical;
        //Communication to other modules
       
        //User inputs from properties tab
        [Description("Fertilise (tick for yes)")]
        public bool Fertilise { get; set; }
        [Description("SeasonStart (dd-MMM)")]
        public string Season_Start { get; set; }
        [Description("SeasonEnd (dd-MMM)")]
        public string Season_End { get; set; }
        [Description("Season Allocation (kg/ha)")]
        public double Season_Allocation { get; set; }
        [Description("Mineral N to maintain soil above (kg/ha)")]
        public double TriggerN { get; set; }
        [Description("Amount of N to apply (kg/ha)")]
        public double NApplicationAmount { get; set; }
        [Description("Minimum days for Fertiliser spreader to return")]
        public double Return_days { get; set; }
        [Description("Depth to calculate mineral N (mm)")]
        public double Top_Depth { get; set; }
       
        //Class members
        [JsonIgnore] private bool FertiliserIsAvailable { get; set; }
        [JsonIgnore] public bool SeasonIsOpen { get; set; }
        [JsonIgnore] private bool CropIsActive { get; set; }
        [JsonIgnore] private bool FertSpreaderIsAvailable { get; set; }
        [JsonIgnore] private bool SoilNIsLow { get; set; }
        [JsonIgnore] public double Top_SoilN { get; set; }
        [JsonIgnore] public double Accumulated_depth { get; set; }
        [JsonIgnore] public double Days_since_fertiliser { get; set; }
        [JsonIgnore] public double Season_Application { get; set; }
        
        //Variables for date logic testing
        [JsonIgnore] public string StartString { get; set; }
        [JsonIgnore] public string EndString { get; set; }
        [JsonIgnore] public DateTime StartDate { get; set; }
        [JsonIgnore] public DateTime EndDate { get; set; }
        [JsonIgnore] public int TodayYear { get; set; }
        [JsonIgnore] public int TodayMonth { get; set; }
        [JsonIgnore] public int StartMonth { get; set; }
        [JsonIgnore] public int EndMonth { get; set; }
        [JsonIgnore] public int TodayDay { get; set; }
        [JsonIgnore] public int StartDay { get; set; }
        [JsonIgnore] public int EndDay { get; set; }
              
        //Determine daily requirement for fertiliser
        [EventSubscribe("StartOfDay")]
        private void OnStartOfDay(object sender, EventArgs e)
        { 
            //Can we irrigate?
            FertiliserIsAvailable = false; 
            if (Fertilise)
                FertiliserIsAvailable = true; 
    
            //Are we Allowed to Irrigate?
            TodayYear = Clock.Today.Year;
            StartString = Season_Start + "-" + TodayYear.ToString();
            EndString = Season_End + "-" + TodayYear.ToString();
            StartDate = DateTime.Parse(StartString);
            EndDate = DateTime.Parse(EndString);
            TodayMonth = Clock.Today.Month;
            TodayDay = Clock.Today.Day;
            StartDay = StartDate.Day;
            StartMonth = StartDate.Month;
            EndDay = EndDate.Day;
            EndMonth = EndDate.Month;
          
            SeasonIsOpen = false;
            //if we are in the spring and after the start date then yes
            if ((Clock.Today.Month > 6) && (Clock.Today >= StartDate))
                SeasonIsOpen = true;
            //if we are in the autumn and before the end date then yes
            if ((Clock.Today.Month <= 6) && (Clock.Today <= EndDate))
                SeasonIsOpen = true;
          
            //Is there a crop in the ground that needs irrigation?
            //CropIsActive = false;
            //if ((phenology.Stage >= 3.0) && (phenology.Stage < 6.0))
            CropIsActive = true;
          
            //Is the irrigator available?
            FertSpreaderIsAvailable = false;
            Days_since_fertiliser += 1;
            if (Days_since_fertiliser >= Return_days)
                FertSpreaderIsAvailable = true;
          
            //Is the soil N low enough to require fertiliser?
            SoilNIsLow = false;
            double CurrentRootDepth = 0;
            double RootDepth = root.Depth;
            CurrentRootDepth = Math.Max(RootDepth, CurrentRootDepth);
          
            Accumulated_depth = 0;
            Top_SoilN = 0;
            for (int layer = 0; Accumulated_depth < Top_Depth; layer++)
            {
                Top_SoilN += NO3.kgha[layer];
                Accumulated_depth += soilPhysical.Thickness[layer];
            }
            if (Top_SoilN <= TriggerN)
                SoilNIsLow = true;
                
            //Lets bloody well irrigate then!!!!
            if ((FertiliserIsAvailable) && (SeasonIsOpen) && (CropIsActive) && (FertSpreaderIsAvailable) && (SoilNIsLow)) //The conditions are rife for irrigation
            {
                Fertiliser.Apply(NApplicationAmount, Fertiliser.Types.UreaN, 10);
                Days_since_fertiliser = 0;
                Season_Application += NApplicationAmount;
                summary.WriteMessage(this, "Automatic Fertiliser", MessageType.Diagnostic);
            
            }
        }
    }
}
```
      RectangularZone Alley: Length=100; Width=2.2; Slope=0; AspectAngle=0; Altitude=50
        Report AlleyZoneReport: EventNames=[Clock].DoReport
        Report ReportBoth: EventNames=[Clock].DoReport
          VariableNames=([Row].Irrigation.IrrigationApplied*[Row].Width + [Alley].Irrigation.IrrigationApplied*[Alley].Width)/([Row].Width + [Alley].Width) as WeightedAverage_IrrigationApplied
        Soil: Latitude=0; Longitude=0
          LayerStructure: Thickness=[200, 200, 200, 200, 200, 200, 300, 300, 400, 800]
          Chemical: Thickness=[100, 200, 300, 300, 300, 300]; PH=[6.6, 6.2, 5.7, 5.5, 5.5, 5.5]; PHUnits=Water
          Water: Thickness=[300, 300, 300, 300, 300, 300, 1200]; InitialValues=[0.4, 0.4, 0.4, 0.46, 0.45, 0.43, 0.43]; InitialPAWmm=663; RelativeTo=LL15; FilledFromTop=false
          WaterBalance SoilWater: same as PatternTest.PatternsTest.Row.Soil.SoilWater
          Organic: FOMCNRatio=30; CarbonUnits=Total
            Thickness  Carbon  SoilCNRatio  FBiom  FInert  FOM
            100        1.82    11.5         0.025  0.3     1243.93
            200        1.47    11.5         0.025  0.4     833.832
            300        1.2     11.5         0.015  0.75    457.617
            300        1.03    11.5         0.01   0.9     251.145
            300        0.47    11.5         0.01   0.96    137.831
            300        0.47    11.5         0.01   0.96    75.6435
          CERESSoilTemperature Temperature
          OutputLayers: Thickness=[300, 300, 300, 300, 300, 300]
          Solute NO3: same as PatternTest.PatternsTest.Row.Soil.NO3
          Solute NH4: same as PatternTest.PatternsTest.Row.Soil.NH4
          Solute Urea: same as PatternTest.PatternsTest.Row.Soil.Urea
          Physical: same as PatternTest.PatternsTest.Row.Soil.Physical
          Nutrient
        SurfaceOrganicMatter: InitialResidueName=wheat_stubble; InitialResidueType=wheat; InitialResidueMass=500; InitialStandingFraction=0; InitialCPR=0; InitialCNR=100
        Fertiliser
        Manager AgrgateZoneVariables
          script: same as in PatternTest.PatternsTest.Row.AgrgateZoneVariables
        Irrigation
        Manager AutomaticIrrigation
          Irrigate = True
          Season_Start = 1-Sep
          Season_End = 30-Apr
          Season_Allocation = 100000
          Refull_Frac = 0.95
          Trigger_Frac = 0.8
          Return_days = 3
          Maximum_Irrigation_Amount = 40
          Top_Depth = 600
```csharp
using Newtonsoft.Json;
using Models.PMF.Phen;
using APSIM.Shared.Utilities;
using System.Xml.Serialization;
using Models.Soils;
using Models.PMF;
using Models.Core;
using System;
using Models.PMF.Organs;
using Models.Interfaces;

        
namespace Models
{
    [Serializable] 
    [System.Xml.Serialization.XmlInclude(typeof(Model))]
    public class Script : Model
    {
        [Link] private ISummary summary;
        [Link] private Irrigation Irrigation;
        [Link] private Clock Clock;
        [Link] private Soil Soil;
        [Link] private Plant SCRUM;
        [Link(Type = LinkType.Path, Path = "[SPRUM].Root")]
        private Root root;
        
        [Link]
        private IPhysical soilPhysical;
        [Link]
        private ISoilWater waterBalance;
        //Communication to other modules
       
        //User inputs from properties tab
        [Description("Irrigation on (yes or no)")]
        public bool Irrigate { get; set; }
        [Description("SeasonStart (dd-MMM)")]
        public string Season_Start { get; set; }
        [Description("SeasonEnd (dd-MMM)")]
        public string Season_End { get; set; }
        [Description("Season Allocation (mm)")]
        public double Season_Allocation { get; set; }
        [Description("% PAWC to refill soil to (0-1)")]
        public double Refull_Frac { get; set; }
        [Description("% PAWC to trigger irrigation (0-1)")]
        public double Trigger_Frac { get; set; }
        [Description("Minimum days for irrigation to return")]
        public double Return_days { get; set; }
        [Description("Maximum irrigation application (mm)")]
        public double Maximum_Irrigation_Amount { get; set; }
        [Description("Depth to calculate PAWC (mm)")]
        public double Top_Depth { get; set; }
       
        //Class members
        [JsonIgnore] private bool IrrigationIsAvailable { get; set; }
        [JsonIgnore] public bool SeasonIsOpen { get; set; }
        [JsonIgnore] private bool CropIsActive { get; set; }
        [JsonIgnore] private bool IrrigatorIsAvailable { get; set; }
        [JsonIgnore] private bool SoilIsDry { get; set; }
        [JsonIgnore] public double Top_DUL { get; set; }
        [JsonIgnore] public double Top_Refull { get; set; }
        [JsonIgnore] public double Top_Trigger { get; set; }
        [JsonIgnore] public double Top_LL { get; set; }
        [JsonIgnore] public double Top_SW { get; set; }
        [JsonIgnore] public double Accumulated_depth { get; set; }
        [JsonIgnore] public double Days_since_irrigation { get; set; }
        [JsonIgnore] public double Amount_to_apply { get; set; }
        [JsonIgnore] public double Season_Application { get; set; }
        
        //Variables for date logic testing
        [JsonIgnore] public string StartString { get; set; }
        [JsonIgnore] public string EndString { get; set; }
        [JsonIgnore] public DateTime StartDate { get; set; }
        [JsonIgnore] public DateTime EndDate { get; set; }
        [JsonIgnore] public int TodayYear { get; set; }
        [JsonIgnore] public int TodayMonth { get; set; }
        [JsonIgnore] public int StartMonth { get; set; }
        [JsonIgnore] public int EndMonth { get; set; }
        [JsonIgnore] public int TodayDay { get; set; }
        [JsonIgnore] public int StartDay { get; set; }
        [JsonIgnore] public int EndDay { get; set; }
       
    
        //Calculate static soil variables
        [EventSubscribe("StartOfSimulation")]
        private void OnStartOfSimulation(object sender, EventArgs e)
        {   
            //Calculated soil water variables
            Accumulated_depth = 0;
            for (int layer = 0; Accumulated_depth < Top_Depth; layer++)
            {
                Top_LL += soilPhysical.LL15mm[layer];
                Top_DUL += soilPhysical.DULmm[layer];
                Accumulated_depth += soilPhysical.Thickness[layer];
            }
            Top_Refull = Top_LL + (Top_DUL - Top_LL) * Refull_Frac;
        }
       
      
        //Determine daily requirement for irrigation
        [EventSubscribe("StartOfDay")]
        private void OnStartOfDay(object sender, EventArgs e)
        { 
            //Can we irrigate?
            IrrigationIsAvailable = false; 
            if (Irrigate)
                IrrigationIsAvailable = true; 
    
            //Are we Allowed to Irrigate?
            TodayYear = Clock.Today.Year;
            StartString = Season_Start + "-" + TodayYear.ToString();
            EndString = Season_End + "-" + TodayYear.ToString();
            StartDate = DateTime.Parse(StartString);
            EndDate = DateTime.Parse(EndString);
            TodayMonth = Clock.Today.Month;
            TodayDay = Clock.Today.Day;
            StartDay = StartDate.Day;
            StartMonth = StartDate.Month;
            EndDay = EndDate.Day;
            EndMonth = EndDate.Month;
          
            SeasonIsOpen = false;
            //if we are in the spring and after the start date then yes
            if ((Clock.Today.Month > 6) && (Clock.Today >= StartDate))
                SeasonIsOpen = true;
            //if we are in the autumn and before the end date then yes
            if ((Clock.Today.Month <= 6) && (Clock.Today <= EndDate))
                SeasonIsOpen = true;
          
            //Is there a crop in the ground that needs irrigation?
            //CropIsActive = false;
            //if ((phenology.Stage >= 3.0) && (phenology.Stage < 6.0))
            CropIsActive = true;
          
            //Is the irrigator available?
            IrrigatorIsAvailable = false;
            Days_since_irrigation += 1;
            if (Days_since_irrigation >= Return_days)
                IrrigatorIsAvailable = true;
          
            //Is the soil dry enough to require irrigation?
            SoilIsDry = false;
            double CurrentRootDepth = 0;
            double RootDepth = root.Depth;
            CurrentRootDepth = Math.Max(RootDepth, CurrentRootDepth);
          
            double RelativeRootDepth = Math.Min(1.0, CurrentRootDepth / Top_Depth);
            Top_Trigger = Math.Min(Top_Refull, Top_DUL - (Top_DUL - Top_LL) * RelativeRootDepth * (1 - Trigger_Frac)); 
          
            Accumulated_depth = 0;
            Top_SW = 0;
            for (int layer = 0; Accumulated_depth < Top_Depth; layer++)
            {
                Top_SW += waterBalance.SWmm[layer];
                Accumulated_depth += soilPhysical.Thickness[layer];
            }
            if (Top_SW <= Top_Trigger)
                SoilIsDry = true;
                
            //Lets bloody well irrigate then!!!!
            if ((IrrigationIsAvailable) && (SeasonIsOpen) && (CropIsActive) && (IrrigatorIsAvailable) && (SoilIsDry)) //The conditions are rife for irrigation
            {
                Amount_to_apply = Math.Min(Top_Refull - Top_SW, Maximum_Irrigation_Amount);
                Amount_to_apply = Math.Min(Amount_to_apply, Season_Allocation - Season_Application); 
                Amount_to_apply = Math.Max(Amount_to_apply, 0.0);
                Irrigation.Apply(Amount_to_apply);
                Days_since_irrigation = 0;
                Season_Application += Amount_to_apply;
                summary.WriteMessage(this, "Automatic Irrigation", MessageType.Diagnostic);
            
            }
        }
    }
}
```
        Manager AutomaticFertiliser
          Season_Start = 1-Aug
          Season_End = 30-Apr
          Season_Allocation = 100000
          TriggerN = 50
          NApplicationAmount = 25
          Return_days = 3
          Top_Depth = 300
          Fertilise = True
```csharp
using Newtonsoft.Json;
using Models.PMF.Phen;
using Models.Soils.Nutrients;
using Models.Interfaces;
using APSIM.Shared.Utilities;
using Models.PMF;
using System.Xml.Serialization;
using Models.Soils;
using Models.Core;
using System;
using Models.PMF.Organs;

        
namespace Models
{
    [Serializable] 
    [System.Xml.Serialization.XmlInclude(typeof(Model))]
    public class Script : Model
    {
        [Link] private ISummary summary;
        [Link] private Fertiliser Fertiliser;
        [Link] private Clock Clock;
        [Link] private Plant SCRUM;
        [Link(ByName = true)]
        private ISolute NO3;
        [Link] private Soils.Soil Soil;
        [Link(Type = LinkType.Path, Path = "[SPRUM].Root")]
        private Root root;
        [Link]
        private IPhysical soilPhysical;
        //Communication to other modules
       
        //User inputs from properties tab
        [Description("Fertilise (tick for yes)")]
        public bool Fertilise { get; set; }
        [Description("SeasonStart (dd-MMM)")]
        public string Season_Start { get; set; }
        [Description("SeasonEnd (dd-MMM)")]
        public string Season_End { get; set; }
        [Description("Season Allocation (kg/ha)")]
        public double Season_Allocation { get; set; }
        [Description("Mineral N to maintain soil above (kg/ha)")]
        public double TriggerN { get; set; }
        [Description("Amount of N to apply (kg/ha)")]
        public double NApplicationAmount { get; set; }
        [Description("Minimum days for Fertiliser spreader to return")]
        public double Return_days { get; set; }
        [Description("Depth to calculate mineral N (mm)")]
        public double Top_Depth { get; set; }
       
        //Class members
        [JsonIgnore] private bool FertiliserIsAvailable { get; set; }
        [JsonIgnore] public bool SeasonIsOpen { get; set; }
        [JsonIgnore] private bool CropIsActive { get; set; }
        [JsonIgnore] private bool FertSpreaderIsAvailable { get; set; }
        [JsonIgnore] private bool SoilNIsLow { get; set; }
        [JsonIgnore] public double Top_SoilN { get; set; }
        [JsonIgnore] public double Accumulated_depth { get; set; }
        [JsonIgnore] public double Days_since_fertiliser { get; set; }
        [JsonIgnore] public double Season_Application { get; set; }
        
        //Variables for date logic testing
        [JsonIgnore] public string StartString { get; set; }
        [JsonIgnore] public string EndString { get; set; }
        [JsonIgnore] public DateTime StartDate { get; set; }
        [JsonIgnore] public DateTime EndDate { get; set; }
        [JsonIgnore] public int TodayYear { get; set; }
        [JsonIgnore] public int TodayMonth { get; set; }
        [JsonIgnore] public int StartMonth { get; set; }
        [JsonIgnore] public int EndMonth { get; set; }
        [JsonIgnore] public int TodayDay { get; set; }
        [JsonIgnore] public int StartDay { get; set; }
        [JsonIgnore] public int EndDay { get; set; }
              
        //Determine daily requirement for fertiliser
        [EventSubscribe("StartOfDay")]
        private void OnStartOfDay(object sender, EventArgs e)
        { 
            //Can we irrigate?
            FertiliserIsAvailable = false; 
            if (Fertilise)
                FertiliserIsAvailable = true; 
    
            //Are we Allowed to Irrigate?
            TodayYear = Clock.Today.Year;
            StartString = Season_Start + "-" + TodayYear.ToString();
            EndString = Season_End + "-" + TodayYear.ToString();
            StartDate = DateTime.Parse(StartString);
            EndDate = DateTime.Parse(EndString);
            TodayMonth = Clock.Today.Month;
            TodayDay = Clock.Today.Day;
            StartDay = StartDate.Day;
            StartMonth = StartDate.Month;
            EndDay = EndDate.Day;
            EndMonth = EndDate.Month;
          
            SeasonIsOpen = false;
            //if we are in the spring and after the start date then yes
            if ((Clock.Today.Month > 6) && (Clock.Today >= StartDate))
                SeasonIsOpen = true;
            //if we are in the autumn and before the end date then yes
            if ((Clock.Today.Month <= 6) && (Clock.Today <= EndDate))
                SeasonIsOpen = true;
          
            //Is there a crop in the ground that needs irrigation?
            //CropIsActive = false;
            //if ((phenology.Stage >= 3.0) && (phenology.Stage < 6.0))
            CropIsActive = true;
          
            //Is the irrigator available?
            FertSpreaderIsAvailable = false;
            Days_since_fertiliser += 1;
            if (Days_since_fertiliser >= Return_days)
                FertSpreaderIsAvailable = true;
          
            //Is the soil N low enough to require fertiliser?
            SoilNIsLow = false;
            double CurrentRootDepth = 0;
            double RootDepth = root.Depth;
            CurrentRootDepth = Math.Max(RootDepth, CurrentRootDepth);
          
            Accumulated_depth = 0;
            Top_SoilN = 0;
            for (int layer = 0; Accumulated_depth < Top_Depth; layer++)
            {
                Top_SoilN += NO3.kgha[layer];
                Accumulated_depth += soilPhysical.Thickness[layer];
            }
            if (Top_SoilN <= TriggerN)
                SoilNIsLow = true;
                
            //Lets bloody well irrigate then!!!!
            if ((FertiliserIsAvailable) && (SeasonIsOpen) && (CropIsActive) && (FertSpreaderIsAvailable) && (SoilNIsLow)) //The conditions are rife for irrigation
            {
                Fertiliser.Apply(NApplicationAmount, Fertiliser.Types.UreaN, 10);
                Days_since_fertiliser = 0;
                Season_Application += NApplicationAmount;
                summary.WriteMessage(this, "Automatic Fertiliser", MessageType.Diagnostic);
            
            }
        }
    }
}
```
        Plant SPRUM
        SprumPasture UnderStory: PotentialGrowthRate=0.9; MaxRootDepth=600; RootThyNeighbour=true; RootNConc=0.01; LeafNConc=0.05; ResidueNConc=0.01; GSMax=0.004; R50=150; LegumePropn=0
        BiomassRemovalEvents OnCut: RemovalType=0
          BiomassRemovals:
            PlantName  OrganName  TypeString  LiveToRemove  DeadToRemove  LiveToResidue  DeadToResidue
            SPRUM      Residue    Cutting     0             0             0.5            0.5
            SPRUM      Leaf       Cutting     0             0             1              1
            SPRUM      Nodule     Cutting     0             0             0              0
            SPRUM      Root       Cutting     0             0             0              0
          Plant PlantToRemoveFrom: same as Replacements.SPRUM
  Folder NZ Experiments
    Experiment Manawatu_1994
      Factors
        Permutation
          Factor _Irr_
            CompositeFactor Control: Specifications=[IrrigationOperations]
              Operations IrrigationOperations
                1994-10-20  [Irrigation].Apply(4)
                1994-10-21  [Irrigation].Apply(4)
                1994-10-22  [Irrigation].Apply(4)
                1994-10-23  [Irrigation].Apply(4)
                1994-10-24  [Irrigation].Apply(4)
                1994-10-25  [Irrigation].Apply(4)
                1994-10-26  [Irrigation].Apply(4)
                1994-10-27  [Irrigation].Apply(4)
                1994-10-28  [Irrigation].Apply(4)
                1994-10-29  [Irrigation].Apply(4)
                1994-10-30  [Irrigation].Apply(4)
                1994-10-31  [Irrigation].Apply(4)
                1994-11-01  [Irrigation].Apply(4)
                1994-11-02  [Irrigation].Apply(4)
                1994-11-03  [Irrigation].Apply(4)
                1994-11-04  [Irrigation].Apply(4)
                1994-11-05  [Irrigation].Apply(4)
                1994-11-06  [Irrigation].Apply(4)
                1994-11-07  [Irrigation].Apply(4)
                1994-11-08  [Irrigation].Apply(4)
                1994-11-09  [Irrigation].Apply(4)
                1994-11-10  [Irrigation].Apply(4)
                1994-11-11  [Irrigation].Apply(4)
                1994-11-12  [Irrigation].Apply(4)
                1994-11-13  [Irrigation].Apply(4)
                1994-11-14  [Irrigation].Apply(4)
                1994-11-15  [Irrigation].Apply(4)
                1994-11-16  [Irrigation].Apply(4)
                1994-11-17  [Irrigation].Apply(4)
                1994-11-18  [Irrigation].Apply(4)
                1994-11-19  [Irrigation].Apply(4)
                1994-11-20  [Irrigation].Apply(4)
                1994-11-21  [Irrigation].Apply(4)
                1994-11-22  [Irrigation].Apply(4)
                1994-11-23  [Irrigation].Apply(4)
                1994-11-24  [Irrigation].Apply(4)
                1994-11-25  [Irrigation].Apply(4)
                1994-11-26  [Irrigation].Apply(4)
                1994-11-27  [Irrigation].Apply(4)
                1994-11-28  [Irrigation].Apply(4)
                1994-11-29  [Irrigation].Apply(4)
                1994-11-30  [Irrigation].Apply(4)
                1994-12-01  [Irrigation].Apply(4)
                1994-12-02  [Irrigation].Apply(4)
                1994-12-03  [Irrigation].Apply(4)
                1994-12-04  [Irrigation].Apply(4)
                1994-12-05  [Irrigation].Apply(4)
                1994-12-06  [Irrigation].Apply(4)
                1994-12-07  [Irrigation].Apply(4)
                1994-12-08  [Irrigation].Apply(4)
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            CompositeFactor EarlyDeficit: Specifications=[IrrigationOperations]
              Operations IrrigationOperations
                1994-12-14  [Irrigation].Apply(2)
                1994-12-15  [Irrigation].Apply(2)
                1994-12-16  [Irrigation].Apply(2)
                1994-12-17  [Irrigation].Apply(2)
                1994-12-18  [Irrigation].Apply(2)
                1994-12-19  [Irrigation].Apply(2)
                1994-12-20  [Irrigation].Apply(2)
                1994-12-21  [Irrigation].Apply(2)
                1994-12-22  [Irrigation].Apply(2)
                1994-12-23  [Irrigation].Apply(2)
                1994-12-24  [Irrigation].Apply(2)
                1994-12-25  [Irrigation].Apply(2)
                1994-12-26  [Irrigation].Apply(2)
                1994-12-27  [Irrigation].Apply(2)
                1994-12-28  [Irrigation].Apply(2)
                1994-12-29  [Irrigation].Apply(2)
                1994-12-30  [Irrigation].Apply(2)
                1994-12-31  [Irrigation].Apply(2)
                1995-01-01  [Irrigation].Apply(2)
                1995-01-02  [Irrigation].Apply(2)
                1995-01-03  [Irrigation].Apply(2)
                1995-01-04  [Irrigation].Apply(2)
                1995-01-05  [Irrigation].Apply(2)
                1995-01-06  [Irrigation].Apply(2)
                1995-01-07  [Irrigation].Apply(2)
                1995-01-08  [Irrigation].Apply(2)
                1995-01-09  [Irrigation].Apply(2)
                1995-01-10  [Irrigation].Apply(2)
                1995-01-11  [Irrigation].Apply(2)
                1995-01-12  [Irrigation].Apply(2)
                1995-01-13  [Irrigation].Apply(2)
                1995-01-14  [Irrigation].Apply(2)
                1995-01-15  [Irrigation].Apply(2)
                1995-01-16  [Irrigation].Apply(2)
                1995-01-17  [Irrigation].Apply(2)
                1995-01-18  [Irrigation].Apply(2)
                1995-01-19  [Irrigation].Apply(2)
                1995-01-20  [Irrigation].Apply(2)
                1995-01-21  [Irrigation].Apply(2)
                1995-01-22  [Irrigation].Apply(2)
                1995-01-23  [Irrigation].Apply(2)
                1995-01-24  [Irrigation].Apply(2)
                1995-01-25  [Irrigation].Apply(2)
                1995-01-26  [Irrigation].Apply(2)
                1995-01-27  [Irrigation].Apply(2)
                1995-01-28  [Irrigation].Apply(2)
                1995-01-29  [Irrigation].Apply(4)
                1995-01-30  [Irrigation].Apply(4)
                1995-01-31  [Irrigation].Apply(4)
                1995-02-01  [Irrigation].Apply(4)
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            CompositeFactor LateDeficit: Specifications=[IrrigationOperations]
              Operations IrrigationOperations
                1994-10-20  [Irrigation].Apply(4)
                1994-10-21  [Irrigation].Apply(4)
                1994-10-22  [Irrigation].Apply(4)
                1994-10-23  [Irrigation].Apply(4)
                1994-10-24  [Irrigation].Apply(4)
                1994-10-25  [Irrigation].Apply(4)
                1994-10-26  [Irrigation].Apply(4)
                1994-10-27  [Irrigation].Apply(4)
                1994-10-28  [Irrigation].Apply(4)
                1994-10-29  [Irrigation].Apply(4)
                1994-10-30  [Irrigation].Apply(4)
                1994-10-31  [Irrigation].Apply(4)
                1994-11-01  [Irrigation].Apply(4)
                1994-11-02  [Irrigation].Apply(4)
                1994-11-03  [Irrigation].Apply(4)
                1994-11-04  [Irrigation].Apply(4)
                1994-11-05  [Irrigation].Apply(4)
                1994-11-06  [Irrigation].Apply(4)
                1994-11-07  [Irrigation].Apply(4)
                1994-11-08  [Irrigation].Apply(4)
                1994-11-09  [Irrigation].Apply(4)
                1994-11-10  [Irrigation].Apply(4)
                1994-11-11  [Irrigation].Apply(4)
                1994-11-12  [Irrigation].Apply(4)
                1994-11-13  [Irrigation].Apply(4)
                1994-11-14  [Irrigation].Apply(4)
                1994-11-15  [Irrigation].Apply(4)
                1994-11-16  [Irrigation].Apply(4)
                1994-11-17  [Irrigation].Apply(4)
                1994-11-18  [Irrigation].Apply(4)
                1994-11-19  [Irrigation].Apply(4)
                1994-11-20  [Irrigation].Apply(4)
                1994-11-21  [Irrigation].Apply(4)
                1994-11-22  [Irrigation].Apply(4)
                1994-11-23  [Irrigation].Apply(4)
                1994-11-24  [Irrigation].Apply(4)
                1994-11-25  [Irrigation].Apply(4)
                1994-11-26  [Irrigation].Apply(4)
                1994-11-27  [Irrigation].Apply(4)
                1994-11-28  [Irrigation].Apply(4)
                1994-11-29  [Irrigation].Apply(4)
                1994-11-30  [Irrigation].Apply(4)
                1994-12-01  [Irrigation].Apply(4)
                1994-12-02  [Irrigation].Apply(4)
                1994-12-03  [Irrigation].Apply(4)
                1994-12-04  [Irrigation].Apply(4)
                1994-12-05  [Irrigation].Apply(4)
                1994-12-06  [Irrigation].Apply(4)
                1994-12-07  [Irrigation].Apply(4)
                1994-12-08  [Irrigation].Apply(4)
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                1995-02-02  [Irrigation].Apply(2)
      Simulation Manawatu_94
        Memo Experiment description
          *	Based on Mills et al (1997).

          *	Lysimeter (1.2 m deep by 1 m wide) trial conducted during the 1994/95 season.

          *	Location: Massey University, Palmerston North (40°2'S, 175°4'E.

          *	Soil: Manawatu fine sandy loam.

          *	Plant material: 4-year-old 'Braeburn' on MM106 rootstock

          *	Date of full bloom (DAF): 20/10/1994

          *	Three irrigation regimes: Control, Early Deficit, Late Deficit
        Clock: Start=1994-06-25; End=1995-08-28
        Summary SummaryFile
        Weather: FileName=PalmerstonNorth-Turitea.met
        MicroClimate: a_interception=0; b_interception=1; c_interception=0; d_interception=0; SoilHeatFluxFraction=0.4; MinimumHeightDiffForNewLayer=0; NightInterceptionFraction=0.5; ReferenceHeight=2
        SoilArbitrator Soil Arbitrator
        RectangularZone Row: Length=1; Width=1; Slope=0; AspectAngle=0; Altitude=50
          Report RowZoneReport
          Report ReportBoth: EventNames=[Clock].DoReport
          SurfaceOrganicMatter: InitialResidueName=wheat_stubble; InitialResidueType=wheat; InitialResidueMass=500; InitialStandingFraction=0; InitialCPR=0; InitialCNR=100
          Plant STRUM
          Fertiliser
          Irrigation
          Manager TreeInitialisation
            CultivarName = Apple
            SowingDate = 07/01/1993 00:00:00
            StartAge = 4
            SurfaceKL = 0.13
            KLReductionFactor = 0.003
            KLReductionDepth = 150
```csharp
using Models.Interfaces;
using Models.Soils;
using APSIM.Shared.Utilities;
using Models.PMF;
using Models.Core;
using System;
using Models.PMF.Organs;
using Models.PMF.Phen;
        
namespace Models
{
    [Serializable] 
    [System.Xml.Serialization.XmlInclude(typeof(Model))]
    public class Script : Model
    {
        [Link] private Plant STRUM;
        [Link] private Clock Clock;
        [Link] private Soil Soil;
        [Link] private Zone zone;
        [Link(Type = LinkType.Path, Path = "[STRUM].Root")]
        private Root root;
        [Link(Type = LinkType.Path, Path = "[STRUM].Phenology")]
        private Phenology phenology;
        [Link]
        private IPhysical soilPhysical;

        [Display(Type = DisplayType.CultivarName)]
        [Description("Plant Type")]
        public string CultivarName { get; set; }
        [Description("Initialisation Date")]
        public DateTime SowingDate { get; set; }
        [Description("Age of trees (in Years) at start of simulation)")]
        public int StartAge {get;set;}

        [Description("Kl in the shallowest layer")]
        public double SurfaceKL { get; set; }
        [Description("Factor to change Kl modifier with Depth")]
        public double KLReductionFactor { get; set; }
        [Description("Depth that KL starts to decline")]
        public double KLReductionDepth { get; set; }
        
        public double[] YKLModifiers { get; set; }
        public double[] XDepth { get; set; }
        private double Depth { get; set; }
        
        [EventSubscribe("DoManagement")]
        private void OnDoManagement(object sender, EventArgs e)
        {
            if (Clock.Today.Date == SowingDate)
            {
                STRUM.Sow(cultivar: CultivarName, population: 1, depth: 1200, rowSpacing: 3000);
                object StartAgeValue = StartAge;
                zone.Set("STRUM.Phenology.Age.Years",StartAgeValue);
            }
        }
    }
}
```
          Manager ClimateControl
            StartDate = 1-jan
            EndDate = 31-dec
```csharp
using Models.Soils;
using System.Xml.Serialization;
using Models;
using Models.PMF;
using System.Text;
using System.Collections.Generic;
using APSIM.Shared.Utilities;
using Models.Core;
using System;
using Models.Climate;

namespace Models
{
    [Serializable] 
    [System.Xml.Serialization.XmlInclude(typeof(Model))]
    public class Script : Model
    {
        [Link] Weather Met;
        [Link] Clock Clock;
    
        [Description("Start Date (d-mmm)")]
        public string StartDate { get; set; }
        
        [Description("End Date (d-mmm)")]
        public string EndDate { get; set; }
 
    
        [EventSubscribe("PreparingNewWeatherData")]
        private void OnPreparingNewWeatherData(object sender, EventArgs e)
        {
            if (DateUtilities.WithinDates(StartDate, Clock.Today, EndDate))
                Met.Rain = 0;        
        }
    }
}
```
          Operations IrrigationOperations
            1986-06-01  [Irrigation].Apply(70);
            1986-06-15  [Irrigation].Apply(70);
            1986-06-29  [Irrigation].Apply(70);
            1986-07-13  [Irrigation].Apply(70);
            1986-07-27  [Irrigation].Apply(70);
            1986-08-10  [Irrigation].Apply(70);
            1986-08-24  [Irrigation].Apply(70);
            1986-09-07  [Irrigation].Apply(70);
          Operations NitrogenOperations
            1993-09-15  [Fertiliser].Apply(25, [Fertiliser].Types.UreaN, 10);
            1993-11-15  [Fertiliser].Apply(25, [Fertiliser].Types.UreaN, 10);
            1994-02-15  [Fertiliser].Apply(50, [Fertiliser].Types.UreaN, 10);
          Soil: SoilType=Silt loam; LocalName=Tokomaru; Site=Massey University 1; NearestTown=Palmerston North, Massey University 1; Region=Manawatu; Country=New Zealand; ApsoilNumber=1365; Latitude=-40.395; Longitude=175.609; LocationAccuracy=+/-50 m; YearOfSampling=2010
            DataSource=The database of New Zealand soils was compiled by AgResearch (www.agresearch.co.nz) and based on soil properties gathered, mainly from publications, in the course of conducting several simulation-based research projects but particularly from the Pastoral 21 Environment program which was funded by the New Zealand Ministry for Business, Innovation and Employment,  Dairy NZ, Fonterra and Meat & Wool NZ.
            Comments=Lowered BD value in layer 5 to make run in APSIM. Original values in rb column.The data is a combination of published or supplied measurements, pedotransfer functions, and expert opinion. See Cichota et al. (2013; Soil Research 51: 92-111, http://dx.doi.org/10.1071/SR12338) for a description of the pedotransfer functions. The soil carbon and fresh organic matter settings have been set as those broadly appropriate for permanent productive pastoral systems, see Cichota el al. (2012; Soil Research 50: 694-707, http://dx.doi.org/10.1071/SR12208). Users should take care to adapt these to local conditions before using the data in simulations. FOM values estimated to be 900 kg/ha of FOM in top 600mm of soil and another 100 kg/ha below. Soil C:N ratios taken from soil Silt loam (Marton NoXXXX).
            Physical
              Thickness  ParticleSizeClay  ParticleSizeSand  ParticleSizeSilt  Rocks  BD   AirDry  LL15  DUL   SAT  KS
              200        20                50                30                0      1.4  0.02    0.05  0.15  0.2  198.563
              200        20                50                30                0      1.4  0.05    0.05  0.15  0.2  231.474
              200        20                50                30                0      1.4  0.05    0.05  0.15  0.2  109.84
              400        10                70                20                40     1.6  0.02    0.02  0.15  0.2  1000
              200        0                 95                5                 0      1.6  0.03    0.03  0.15  0.2  500
              BD source: Field measured and checked for sensibility
              AirDry source: Estimated based on local knowledge
              LL15, DUL source: Laboratory measured
              SAT source: Calculated from measured, estimated or calculated BD
              SoilCrop STRUMSoil: LL=[0.05, 0.05, 0.05, 0.02, 0.03]; KL=[0.1, 0.1, 0.1, 0.1, 0.1]; XF=[1, 1, 1, 1, 1]
                LL source: Estimated based on local knowledge
            WaterBalance SoilWater: SummerDate=1-nov; SummerU=0; SummerCona=0; WinterDate=1-apr; WinterU=0; WinterCona=0; DiffusConst=88; DiffusSlope=35; Salb=1; CN2Bare=0; CNRed=20; CNCov=0.8; DischargeWidth=0; CatchmentArea=0; PSIDul=-100; Thickness=[100, 150, 200, 350, 700]; SWCON=[0.57, 0.9, 0.9, 0.9, 0.9]
            Organic: FOMCNRatio=40; CarbonUnits=Total
              Thickness  Carbon  SoilCNRatio  FBiom  FInert  FOM
              100        4.5     11.026       0.08   0.47    58.943
              150        2       11.026       0.05   0.457   43.666
              200        0.75    11.026       0.008  0.77    29.27
              350        0.35    11.026       0.008  0.928   14.535
              700        0.1     11.026       0.008  0.982   3.584
            Chemical: Thickness=[100, 150, 200, 350, 700]; PH=[6.5, 6.5, 6.5, 6.5, 6.5]; PHUnits=Water
              PH source: Estimated based on local knowledge
            Water: Thickness=[200, 200, 200, 400, 200]; InitialValues=[0.15, 0.15, 0.15, 0.15, 0.15]; InitialPAWmm=136; RelativeTo=LL15; FilledFromTop=false
            CERESSoilTemperature
            Solute NO3: Thickness=[100, 150, 200, 350, 700]; InitialValues=[217, 15, 1.667, 1.667, 0]; InitialValuesUnits=ppm; WaterTableConcentration=0; D0=0; DepthConstant=0; MaxDepthSoluteAccessible=0; RunoffEffectivenessAtMovingSolute=0; MaxEffectiveRunoff=0
            Solute NH4: Thickness=[100, 150, 200, 350, 700]; InitialValues=[0, 0, 0, 0, 0]; InitialValuesUnits=ppm; WaterTableConcentration=0; D0=0; DepthConstant=0; MaxDepthSoluteAccessible=0; RunoffEffectivenessAtMovingSolute=0; MaxEffectiveRunoff=0
            Solute Urea: Thickness=[100, 150, 200, 350, 700]; InitialValues=[0, 0, 0, 0, 0]; InitialValuesUnits=kg/ha; WaterTableConcentration=0; D0=0; DepthConstant=0; MaxDepthSoluteAccessible=0; RunoffEffectivenessAtMovingSolute=0; MaxEffectiveRunoff=0
            OutputLayers: Thickness=[200, 200, 200, 200, 200, 200]
            LayerStructure: Thickness=[200, 200, 200, 200, 200, 200]
            Nutrient
          StrumTreeInstance Apple: AgeAtSimulationStart=6; YearsToMaxDimension=6; TrunkMassAtMaxDimension=12; BudBreakDAWS=100; StartFullCanopyDAWS=150; StartLeafFallDAWS=305; EndLeafFallDAWS=330; MaxRD=3000; RootThyNeighbour=true; CanopyBaseHeight=1000; MaxPrunedHeight=2800; SeasonalHeightGrowth=700; MaxPrunedWidth=700; SeasonalWidthGrowth=300; RootNConc=0.01; LeafNConc=0.02; TrunkNConc=0.01; FruitNConc=0.02; ExtinctCoeff=0.8; MaxLAI=8; GSMax=0.004; R50=100; Number=50; Size=85; Density=0.75; DMC=0.16; DAWSMaxBloom=120; DAWSLinearGrowth=190; DAWSMaxSize=350
          Manager AgrgateZoneVariables
            script: same as in PatternTest.PatternsTest.Row.AgrgateZoneVariables
          Manager AutomaticFertiliser: same as PatternTest.PatternsTest.Row.AutomaticFertiliser
          Manager DAS
            DAS = 0
```csharp
using Models.Soils;
using System;
using Models.Core;
using System.Collections.Generic;
using System.Text;
using Models.PMF;
using Models;
using System.Xml.Serialization;
using APSIM.Shared.Utilities;
using System.Data;

namespace Models
{
    [Serializable] 
    //[System.Xml.Serialization.XmlInclude(typeof(Model))]
    public class Script : Model
    {
        
    
        
        
        [Description("Days after start")]
        public double DAS { get; set; }
        
         [EventSubscribe("StartOfSimulation")]
        private void DoStartOfSimulation(object sender, EventArgs e)
        {
            DAS = 0;
        }
        
        [EventSubscribe("DoReportCalculations")]
        private void OnDoReportCalculations(object sender, EventArgs e)
        {
            DAS += 1;
        }
    
    }
}
```
    Experiment Manawatu_1997
      Factors
        Permutation
          Factor _Irr_
            CompositeFactor Control: Specifications=[IrrigationOperations]
              Operations IrrigationOperations
                1997-10-20  [Irrigation].Apply(2.6)
                1997-10-21  [Irrigation].Apply(2.6)
                1997-10-22  [Irrigation].Apply(2.6)
                1997-10-23  [Irrigation].Apply(2.6)
                1997-10-24  [Irrigation].Apply(2.6)
                1997-10-25  [Irrigation].Apply(2.6)
                1997-10-26  [Irrigation].Apply(2.6)
                1997-10-27  [Irrigation].Apply(2.6)
                1997-10-28  [Irrigation].Apply(2.6)
                1997-10-29  [Irrigation].Apply(2.6)
                1997-10-30  [Irrigation].Apply(2.6)
                1997-10-31  [Irrigation].Apply(2.6)
                1997-11-01  [Irrigation].Apply(2.6)
                1997-11-02  [Irrigation].Apply(2.6)
                1997-11-03  [Irrigation].Apply(2.6)
                1997-11-04  [Irrigation].Apply(2.6)
                1997-11-05  [Irrigation].Apply(2.6)
                1997-11-06  [Irrigation].Apply(2.6)
                1997-11-07  [Irrigation].Apply(2.6)
                1997-11-08  [Irrigation].Apply(2.6)
                1997-11-09  [Irrigation].Apply(2.6)
                1997-11-10  [Irrigation].Apply(2.6)
                1997-11-11  [Irrigation].Apply(2.6)
                1997-11-12  [Irrigation].Apply(2.6)
                1997-11-13  [Irrigation].Apply(2.6)
                1997-11-14  [Irrigation].Apply(2.6)
                1997-11-15  [Irrigation].Apply(2.6)
                1997-11-16  [Irrigation].Apply(2.6)
                1997-11-17  [Irrigation].Apply(2.6)
                1997-11-18  [Irrigation].Apply(2.6)
                1997-11-19  [Irrigation].Apply(2.6)
                1997-11-20  [Irrigation].Apply(2.6)
                1997-11-21  [Irrigation].Apply(2.6)
                1997-11-22  [Irrigation].Apply(2.6)
                1997-11-23  [Irrigation].Apply(2.6)
                1997-11-24  [Irrigation].Apply(2.6)
                1997-11-25  [Irrigation].Apply(2.6)
                1997-11-26  [Irrigation].Apply(2.6)
                1997-11-27  [Irrigation].Apply(2.6)
                1997-11-28  [Irrigation].Apply(2.6)
                1997-11-29  [Irrigation].Apply(2.6)
                1997-11-30  [Irrigation].Apply(2.6)
                1997-12-01  [Irrigation].Apply(2.6)
                1997-12-02  [Irrigation].Apply(2.6)
                1997-12-03  [Irrigation].Apply(2.6)
                1997-12-04  [Irrigation].Apply(2.6)
                1997-12-05  [Irrigation].Apply(2.6)
                1997-12-06  [Irrigation].Apply(2.6)
                1997-12-07  [Irrigation].Apply(2.6)
                1997-12-08  [Irrigation].Apply(2.6)
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                1998-02-12  [Irrigation].Apply(4)
            CompositeFactor Deficit: Specifications=[IrrigationOperations]
              Operations IrrigationOperations
                1997-10-20  [Irrigation].Apply(2.6)
                1997-10-21  [Irrigation].Apply(2.6)
                1997-10-22  [Irrigation].Apply(2.6)
                1997-10-23  [Irrigation].Apply(2.6)
                1997-10-24  [Irrigation].Apply(2.6)
                1997-10-25  [Irrigation].Apply(2.6)
                1997-10-26  [Irrigation].Apply(2.6)
                1997-10-27  [Irrigation].Apply(2.6)
                1997-10-28  [Irrigation].Apply(2.6)
                1997-10-29  [Irrigation].Apply(2.6)
                1997-10-30  [Irrigation].Apply(2.6)
                1997-10-31  [Irrigation].Apply(2.6)
                1997-11-01  [Irrigation].Apply(2.6)
                1997-11-02  [Irrigation].Apply(2.6)
                1997-11-03  [Irrigation].Apply(2.6)
                1997-11-04  [Irrigation].Apply(2.6)
                1997-11-05  [Irrigation].Apply(2.6)
                1997-11-06  [Irrigation].Apply(2.6)
                1997-11-07  [Irrigation].Apply(2.6)
                1997-11-08  [Irrigation].Apply(2.6)
                1997-11-09  [Irrigation].Apply(2.6)
                1997-11-10  [Irrigation].Apply(2.6)
                1997-11-11  [Irrigation].Apply(2.6)
                1997-11-12  [Irrigation].Apply(2.6)
                1997-11-13  [Irrigation].Apply(2.6)
                1997-11-14  [Irrigation].Apply(2.6)
                1997-11-15  [Irrigation].Apply(2.6)
                1997-11-16  [Irrigation].Apply(2.6)
                1997-11-17  [Irrigation].Apply(2.6)
                1997-11-18  [Irrigation].Apply(2.6)
                1997-11-19  [Irrigation].Apply(2.6)
                1997-11-20  [Irrigation].Apply(2.6)
                1997-11-21  [Irrigation].Apply(2.6)
                1997-11-22  [Irrigation].Apply(2.6)
                1997-11-23  [Irrigation].Apply(2.6)
                1997-11-24  [Irrigation].Apply(2.6)
                1997-11-25  [Irrigation].Apply(2.6)
                1997-11-26  [Irrigation].Apply(2.6)
                1997-11-27  [Irrigation].Apply(2.6)
                1997-11-28  [Irrigation].Apply(2.6)
                1997-11-29  [Irrigation].Apply(2.6)
                1997-11-30  [Irrigation].Apply(2.6)
                1997-12-01  [Irrigation].Apply(2.6)
                1997-12-02  [Irrigation].Apply(2.6)
                1997-12-03  [Irrigation].Apply(2.6)
                1997-12-04  [Irrigation].Apply(2.6)
                1997-12-05  [Irrigation].Apply(2.6)
                1997-12-06  [Irrigation].Apply(2.6)
                1997-12-07  [Irrigation].Apply(2.6)
                1997-12-08  [Irrigation].Apply(2.6)
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                1998-02-12  [Irrigation].Apply(0.8)
                1998-02-25  [Irrigation].Apply(20.8)
      Simulation Manawatu_97
        Memo Experiment description
          *	Based on Mpelasako et 2001.

          *	Lysimeter (1.2 m deep by 1 m wide) trial conducted during the 1997/98 season.

          *	Location: Massey University, Palmerston North (40°2'S, 175°4'E.

          *	Soil: Manawatu fine sandy loam.

          *	Plant material: 4-year-old 'Braeburn' on MM106 rootstock

          *	Full bloom assumed to be 20/10/1997 - date estimated to be similar to Mills et al (1997)
        Clock: Start=1997-07-01; End=1998-06-30
        Summary SummaryFile
        Weather: FileName=PalmerstonNorth-Turitea.met
        MicroClimate: a_interception=0; b_interception=1; c_interception=0; d_interception=0; SoilHeatFluxFraction=0.4; MinimumHeightDiffForNewLayer=0; NightInterceptionFraction=0.5; ReferenceHeight=2
        SoilArbitrator Soil Arbitrator
        RectangularZone Row: Length=1; Width=1; Slope=0; AspectAngle=0; Altitude=50
          Report RowZoneReport: EventNames=[Clock].DoReport
            VariableNames:
              [Clock].Today
              [AgrgateZoneVariables].Script.FRadInt as f.rad.int
              [Soil].OutputLayers.SW
              sum([Soil].OutputLayers.SWmm) as psw
              [Weather].DaysSinceWinterSolstice
              [Weather].Rain
              [Irrigation].IrrigationApplied
              [Soil].SoilWater.Drainage
              [Weather].DaysSinceWinterSolstice
              [Row].STRUM.Leaf.Transpiration
              [Row].STRUM.Leaf.Height
              [Row].STRUM.Leaf.CoverGreen
              [Row].STRUM.Leaf.LAI
              [Row].STRUM.Leaf.WaterDemand
              [Row].STRUM.Leaf.Width
              [Row].STRUM.Leaf.RadiationIntercepted
              [Weather].Radn
              [Row].STRUM.Trunk.EnergyBalance.RadiationInterceptedByDead
              [Row].STRUM.Phenology.Age.Years
              [Row].STRUM.Phenology.Stage
              [Row].STRUM.Leaf.Wt
              [Row].STRUM.Fruit.Wt
              [Row].STRUM.Trunk.Wt
              [Row].STRUM.Root.Wt
              [Row].STRUM.Trunk.EnergyBalance.LAIDead
              [Row].STRUM.Leaf.Fw
              [AnnualReset].Script.AccumFW
              ([Row].STRUM.Leaf.Wt + [Row].STRUM.Fruit.Wt + [Row].STRUM.Trunk.Wt) as AboveGroundWt
              ([Soil].OutputLayers.SWmm[1]+[Soil].OutputLayers.SWmm[2]+[Soil].OutputLayers.SWmm[3]+[Soil].OutputLayers.SWmm[4]+[Soil].OutputLayers.SWmm[5]+[Soil].OutputLayers.SWmm[6]) as ProfileSWmm
              [Soil].SoilNitrogen.MineralN
          Report BothZoneReport: EventNames=[Clock].DoReport
          SurfaceOrganicMatter: InitialResidueName=wheat_stubble; InitialResidueType=wheat; InitialResidueMass=500; InitialStandingFraction=0; InitialCPR=0; InitialCNR=100
          Plant STRUM
          Fertiliser
          Irrigation
          Manager AgrgateZoneVariables
```csharp
using Models.Climate;
using System;
using Models.Core;
using Models.PMF;
using System.Collections.Generic;
using Models.Soils;
using APSIM.Shared.Utilities;
using Models.Zones;
using Models.PMF.Organs;

namespace Models
{
    [Serializable]
    public class Script : Model
    {
        [Link] private Weather weather;
        [Link] private RectangularZone zone {get; set;}
        private double AreaWidth {get; set;}
        public double TotRadn {get; set;}
        public double FRadInt {get; set;}
        public double ET {get; set;}
        public double ES {get; set;}
        public double PET {get; set;}
        public double LAI {get; set;}
        public double Height {get; set;}
        public double RootDepth {get; set;}
        public double PlantWidth {get; set;}
        public double InterceptedRadiation {get; set;}
        public double TreeRadInt {get; set;}


        [EventSubscribe("StartOfSimulation")]
        private void DoStartOfSimulation(object sender, EventArgs e)
        {
               AreaWidth = zone.Width;
               PlantWidth = 0;
        }
        
        [EventSubscribe("DoReportCalculations")]
        private void OnDoReportCalculations(object sender, EventArgs e)
        {
           if (zone.Name == "Row")
                {
                TreeRadInt = (double)zone.Get("STRUM.Leaf.RadiationIntercepted") + (double)zone.Get("STRUM.Trunk.EnergyBalance.RadiationInterceptedByDead");
                FRadInt = (TreeRadInt * zone.Width)/(weather.Radn * AreaWidth);
                InterceptedRadiation = (double)zone.Get("STRUM.Leaf.RadiationIntercepted");
                ET = (double)zone.Get("STRUM.Leaf.Transpiration") * zone.Width/AreaWidth;
                LAI = (double)zone.Get("STRUM.Leaf.LAI");
                Height = (double)zone.Get("STRUM.Leaf.Height");
                RootDepth = (double)zone.Get("STRUM.Root.Depth");
                PlantWidth = (double)zone.Get("STRUM.Leaf.Width");
                }
           
            TotRadn = weather.Radn * AreaWidth; 
            ES = (double)zone.Get("[Soil].SoilWater.Es") * zone.Width/AreaWidth;
            double PETWidth = Math.Min(Math.Max(PlantWidth,zone.Width),AreaWidth);
            PET = (double)zone.Get("[Soil].SoilWater.Eo") * PETWidth/AreaWidth;
        }
    }
}
```
          Operations IrrigationOperations
          Soil: SoilType=Silt loam; LocalName=Tokomaru; Site=Massey University 1; NearestTown=Palmerston North, Massey University 1; Region=Manawatu; Country=New Zealand; ApsoilNumber=1365; Latitude=-40.395; Longitude=175.609; LocationAccuracy=+/-50 m; YearOfSampling=2010
            DataSource=The database of New Zealand soils was compiled by AgResearch (www.agresearch.co.nz) and based on soil properties gathered, mainly from publications, in the course of conducting several simulation-based research projects but particularly from the Pastoral 21 Environment program which was funded by the New Zealand Ministry for Business, Innovation and Employment,  Dairy NZ, Fonterra and Meat & Wool NZ.
            Comments=Lowered BD value in layer 5 to make run in APSIM. Original values in rb column.The data is a combination of published or supplied measurements, pedotransfer functions, and expert opinion. See Cichota et al. (2013; Soil Research 51: 92-111, http://dx.doi.org/10.1071/SR12338) for a description of the pedotransfer functions. The soil carbon and fresh organic matter settings have been set as those broadly appropriate for permanent productive pastoral systems, see Cichota el al. (2012; Soil Research 50: 694-707, http://dx.doi.org/10.1071/SR12208). Users should take care to adapt these to local conditions before using the data in simulations. FOM values estimated to be 900 kg/ha of FOM in top 600mm of soil and another 100 kg/ha below. Soil C:N ratios taken from soil Silt loam (Marton NoXXXX).
            Physical: same as NZ Experiments.Manawatu_1994.Manawatu_94.Row.Soil.Physical
            WaterBalance SoilWater: SummerDate=1-nov; SummerU=0; SummerCona=0; WinterDate=1-apr; WinterU=0; WinterCona=0; DiffusConst=88; DiffusSlope=35; Salb=1; CN2Bare=0; CNRed=20; CNCov=0.8; PSIDul=-100; Thickness=[100, 150, 200, 350, 700]; SWCON=[0.57, 0.9, 0.9, 0.9, 0.9]
            Organic: same as NZ Experiments.Manawatu_1994.Manawatu_94.Row.Soil.Organic
            Chemical: same as NZ Experiments.Manawatu_1994.Manawatu_94.Row.Soil.Chemical
            Water: Thickness=[200, 200, 200, 400, 200]; InitialValues=[0.15, 0.15, 0.15, 0.15, 0.15]; InitialPAWmm=136; RelativeTo=LL15; FilledFromTop=false
            CERESSoilTemperature
            Solute NO3: same as NZ Experiments.Manawatu_1994.Manawatu_94.Row.Soil.NO3
            Solute NH4: Thickness=[100, 150, 200, 350, 700]; InitialValues=[0, 0, 0, 0, 0]; InitialValuesUnits=ppm; WaterTableConcentration=0; D0=0; DepthConstant=0; MaxDepthSoluteAccessible=0; RunoffEffectivenessAtMovingSolute=0; MaxEffectiveRunoff=0
            Solute Urea: Thickness=[100, 150, 200, 350, 700]; InitialValues=[0, 0, 0, 0, 0]; InitialValuesUnits=kg/ha; WaterTableConcentration=0; D0=0; DepthConstant=0; MaxDepthSoluteAccessible=0; RunoffEffectivenessAtMovingSolute=0; MaxEffectiveRunoff=0
            OutputLayers: Thickness=[200, 200, 200, 200, 200, 200, 200]
            LayerStructure: Thickness=[200, 200, 200, 200, 200, 200, 100]
            Nutrient
          Manager ClimateControl
            StartDate = 20-oct
            EndDate = 15-apr
            script: same as in NZ Experiments.Manawatu_1994.Manawatu_94.Row.ClimateControl
          Manager AutomaticFertiliser: same as PatternTest.PatternsTest.Row.AutomaticFertiliser
          StrumTreeInstance Apple: AgeAtSimulationStart=6; YearsToMaxDimension=6; TrunkMassAtMaxDimension=12; BudBreakDAWS=100; StartFullCanopyDAWS=150; StartLeafFallDAWS=305; EndLeafFallDAWS=330; MaxRD=1500; RootThyNeighbour=false; CanopyBaseHeight=1000; MaxPrunedHeight=2800; SeasonalHeightGrowth=700; MaxPrunedWidth=700; SeasonalWidthGrowth=300; RootNConc=0.01; LeafNConc=0.02; TrunkNConc=0.01; FruitNConc=0.02; ExtinctCoeff=0.8; MaxLAI=8; GSMax=0.006; R50=100; Number=50; Size=85; Density=0.75; DMC=0.16; DAWSMaxBloom=120; DAWSLinearGrowth=190; DAWSMaxSize=350
          Manager DAS: same as NZ Experiments.Manawatu_1994.Manawatu_94.Row.DAS
    Simulation Apple_Dwarf
      Memo ExperimentDescription
        *	Based on Green et al 2013 - PFR report for the Hawkes Bay Regional Council

        * 	Location: Hastings, NZ

        *	Cultivar: Pink Lady

        *	Transpiration measured using sap flow sensors.
      Clock: Start=2008-07-01; End=2011-07-01
      Summary SummaryFile
      Weather: FileName=Whakatu.met
      MicroClimate: a_interception=0; b_interception=1; c_interception=0; d_interception=0; SoilHeatFluxFraction=0.4; MinimumHeightDiffForNewLayer=0; NightInterceptionFraction=0.5; ReferenceHeight=2
      SoilArbitrator Soil Arbitrator
      RectangularZone Row: Length=100; Width=1.3; Slope=0; AspectAngle=0; Altitude=50
        Report RowZoneReport: EventNames=[Clock].DoReport
        Report ReportBoth: EventNames=[Clock].DoReport
          VariableNames=([Row].Irrigation.IrrigationApplied*[Row].Width + [Alley].Irrigation.IrrigationApplied*[Alley].Width)/([Row].Width + [Alley].Width) as WeightedAverage_IrrigationApplied
        Report Drainage: EventNames=[Clock].DoReport
          VariableNames:
            [Clock].Today
            sum of [Soil].SoilWater.Flux[6] from 2008-10-01 to 2011-03-08 as drainage
            [Soil].Water.MM[9] + [Soil].Water.MM[10] as SW_belowRoots
        Soil: Latitude=0; Longitude=0
          LayerStructure: Thickness=[200, 200, 200, 200, 200, 200, 300, 300, 400, 800]
          Chemical: Thickness=[100, 200, 300, 300, 300, 300]; PH=[6.6, 6.2, 5.7, 5.5, 5.5, 5.5]; PHUnits=Water
          Water: Thickness=[300, 300, 300, 300, 300, 300, 1200]; InitialValues=[0.37, 0.37, 0.378, 0.421, 0.412, 0.395, 0.395]; InitialPAWmm=562.8; RelativeTo=LL15; FilledFromTop=false
          WaterBalance SoilWater: same as PatternTest.PatternsTest.Row.Soil.SoilWater
          Organic: same as PatternTest.PatternsTest.Alley.Soil.Organic
          CERESSoilTemperature Temperature
          OutputLayers: Thickness=[300, 300, 300, 300, 300, 300]
          Solute NO3: same as PatternTest.PatternsTest.Row.Soil.NO3
          Solute NH4: same as PatternTest.PatternsTest.Row.Soil.NH4
          Solute Urea: same as PatternTest.PatternsTest.Row.Soil.Urea
          Physical
            Thickness  BD  AirDry  LL15  DUL   SAT   KS
            300        1   0.2     0.2   0.4   0.5   100
            300        1   0.2     0.2   0.4   0.5   100
            300        1   0.25    0.25  0.4   0.5   50
            300        1   0.2     0.2   0.46  0.5   40
            300        1   0.2     0.2   0.45  0.5   40
            300        1   0.2     0.2   0.43  0.53  40
            1200       1   0.2     0.2   0.43  0.53  40
            SoilCrop STRUMSoil: LL=[0.2, 0.2, 0.2, 0.2, 0.2, 0.2, 0.2]; KL=[0.1, 0.1, 0.1, 0.1, 0.1, 0.1, 0.1]; XF=[1, 1, 1, 1, 1, 1, 1]
            SoilCrop SPRUMSoil: LL=[0.2, 0.2, 0.2, 0.2, 0.2, 0.2, 0.2]; KL=[0.11, 0.11, 0.11, 0.11, 0.11, 0.11, 0.11]; XF=[1, 1, 1, 1, 1, 1, 1]
          Nutrient
        SurfaceOrganicMatter: InitialResidueName=wheat_stubble; InitialResidueType=wheat; InitialResidueMass=500; InitialStandingFraction=0; InitialCPR=0; InitialCNR=100
        Plant STRUM
        StrumTreeInstance Apple: AgeAtSimulationStart=6; YearsToMaxDimension=6; TrunkMassAtMaxDimension=12; BudBreakDAWS=70; StartFullCanopyDAWS=125; StartLeafFallDAWS=290; EndLeafFallDAWS=305; MaxRD=3000; RootThyNeighbour=true; CanopyBaseHeight=1000; MaxPrunedHeight=2800; SeasonalHeightGrowth=700; MaxPrunedWidth=1300; SeasonalWidthGrowth=300; RootNConc=0.01; LeafNConc=0.02; TrunkNConc=0.01; FruitNConc=0.02; ExtinctCoeff=0.8; MaxLAI=8; GSMax=0.004; R50=100; Number=50; Size=70; Density=0.75; DMC=0.14; DAWSMaxBloom=60; DAWSLinearGrowth=150; DAWSMaxSize=300
        Fertiliser
        Irrigation
        Operations
          2008-09-16  [Irrigation].apply(15)
          2008-10-05  [Irrigation].apply(5)
          2008-10-06  [Irrigation].apply(6)
          2008-10-11  [Irrigation].apply(15)
          2008-10-18  [Irrigation].apply(16)
          2008-10-22  [Irrigation].apply(2)
          2008-10-25  [Irrigation].apply(12)
          2008-11-01  [Irrigation].apply(6)
          2008-11-04  [Irrigation].apply(20)
          2008-11-14  [Irrigation].apply(15)
          2008-11-19  [Irrigation].apply(15)
          2008-11-23  [Irrigation].apply(15)
          2008-11-27  [Irrigation].apply(15)
          2008-12-01  [Irrigation].apply(2)
          2008-12-03  [Irrigation].apply(15)
          2008-12-06  [Irrigation].apply(15)
          2008-12-13  [Irrigation].apply(9)
          2008-12-16  [Irrigation].apply(15)
          2008-12-24  [Irrigation].apply(16)
          2008-12-31  [Irrigation].apply(8)
          2009-01-04  [Irrigation].apply(15)
          2009-01-11  [Irrigation].apply(15)
          2009-01-18  [Irrigation].apply(15)
          2009-01-24  [Irrigation].apply(15)
          2009-01-30  [Irrigation].apply(15)
          2009-02-04  [Irrigation].apply(15)
          2009-02-12  [Irrigation].apply(18)
          2009-02-16  [Irrigation].apply(12)
          2009-02-20  [Irrigation].apply(7)
          2009-03-01  [Irrigation].apply(50)
          2009-03-22  [Irrigation].apply(25)
          2009-12-16  [Irrigation].apply(20)
          2009-12-21  [Irrigation].apply(20)
          2009-12-26  [Irrigation].apply(20)
          2010-01-03  [Irrigation].apply(20)
          2010-01-08  [Irrigation].apply(15)
          2010-03-17  [Irrigation].apply(20)
          2010-03-18  [Irrigation].apply(20)
          2010-03-19  [Irrigation].apply(20)
          2010-03-12  [Irrigation].apply(20)
          2010-10-28  [Irrigation].apply(15)
          2010-10-29  [Irrigation].apply(15)
          2010-11-30  [Irrigation].apply(15)
          2010-12-06  [Irrigation].apply(15)
          2010-12-07  [Irrigation].apply(15)
          2010-12-27  [Irrigation].apply(15)
          2011-01-02  [Irrigation].apply(15)
          2011-01-04  [Irrigation].apply(15)
          2011-01-29  [Irrigation].apply(15)
          2011-02-16  [Irrigation].apply(15)
        Manager AgrgateZoneVariables
```csharp
using Models.Climate;
using System;
using Models.Core;
using Models.PMF;
using System.Collections.Generic;
using Models.Soils;
using APSIM.Shared.Utilities;
using Models.Zones;
using Models.PMF.Organs;

namespace Models
{
    [Serializable]
    public class Script : Model
    {
        [Link] private Weather weather;
        private RectangularZone AlleyZone {get; set; }
        private RectangularZone RowZone {get; set;}
        private RectangularZone ThisZone {get; set;}
        private double AreaWidth {get; set;}
        public double TotRadn {get; set;}
        public double FRadInt {get; set;}
        public double ET {get; set;}
        public double ES {get; set;}
        public double PET {get; set;}
        public double LAI {get; set;}
        public double Height {get; set;}
        public double RootDepth {get; set;}
        public double PlantWidth {get; set;}
        public double InterceptedRadiation {get; set;}
        public double TreeRadInt {get; set;}


        [EventSubscribe("StartOfSimulation")]
        private void DoStartOfSimulation(object sender, EventArgs e)
        {
               
               ThisZone = this.Parent.Parent as RectangularZone;
               RowZone = this.Parent.Parent.Parent.FindInScope("Row") as RectangularZone;
               AlleyZone = (RectangularZone)this.Parent.Parent.Parent.FindInScope("Alley") as RectangularZone;
               AreaWidth = AlleyZone.Width + RowZone.Width;
               PlantWidth = 0;
        }
        
        [EventSubscribe("DoReportCalculations")]
        private void OnDoReportCalculations(object sender, EventArgs e)
        {

            if (ThisZone.Name == "Row")
                {
                TreeRadInt = (double)RowZone.Get("STRUM.Leaf.RadiationIntercepted") + (double)RowZone.Get("STRUM.Trunk.EnergyBalance.RadiationInterceptedByDead");
                FRadInt = (TreeRadInt * RowZone.Width)/(weather.Radn * AreaWidth);
                InterceptedRadiation = (double)RowZone.Get("STRUM.Leaf.RadiationIntercepted");
                ET = (double)RowZone.Get("STRUM.Leaf.Transpiration") * RowZone.Width/AreaWidth;
                LAI = (double)RowZone.Get("STRUM.Leaf.LAI");
                Height = (double)RowZone.Get("STRUM.Leaf.Height");
                RootDepth = (double)RowZone.Get("STRUM.Root.Depth");
                PlantWidth = (double)RowZone.Get("STRUM.Leaf.Width")/1000;
                }
            else
                {
                FRadInt = ((double)AlleyZone.Get("SPRUM.Leaf.RadiationIntercepted") * AlleyZone.Width)/(weather.Radn * AreaWidth);
                InterceptedRadiation = (double)AlleyZone.Get("SPRUM.Leaf.RadiationIntercepted");
                ET = (double)AlleyZone.Get("SPRUM.Leaf.Transpiration") * ThisZone.Width/AreaWidth;
                LAI = (double)AlleyZone.Get("SPRUM.Leaf.LAI");
                Height = (double)AlleyZone.Get("SPRUM.Leaf.Height");
                RootDepth = (double)AlleyZone.Get("SPRUM.Root.Depth");
                }
            TotRadn = weather.Radn * AreaWidth; 
            ES = (double)ThisZone.Get("Soil.SoilWater.Es") * ThisZone.Width/AreaWidth;
            double PETWidth = Math.Min(Math.Max(PlantWidth,ThisZone.Width),AreaWidth);
            PET = (double)ThisZone.Get("Soil.SoilWater.Eo") * PETWidth/AreaWidth;
        }
    }
}
```
        Manager WaterTable
          StartDate = 1-dec
          EndDate = 1-mar
```csharp
using Models.Zones;
using APSIM.Shared.Utilities;
using Models.Soils;
using System.Collections.Generic;
using Models.PMF;
using Models.Core;
using System;

namespace Models
{
    [Serializable]
    public class Script : Model
    {
        [Link] Clock Clock;
        [Link] Soil soil;
        [Link] Irrigation irrigation;
        [Description("Start of sowing window (d-mmm)")]
        public string StartDate { get; set; }
        [Description("End of sowing window (d-mmm)")]
        public string EndDate { get; set; }

        [EventSubscribe("StartOfDay")]
        private void OnStartOfDay(object sender, EventArgs e)
        {
        if (DateUtilities.WithinDates(StartDate, Clock.Today, EndDate))
            irrigation.Apply(2, 2500);
        }
    }
}
```
        Manager DAS: same as NZ Experiments.Manawatu_1994.Manawatu_94.Row.DAS
      RectangularZone Alley: Length=100; Width=2.2; Slope=0; AspectAngle=0; Altitude=50
        Report AlleyZoneReport: EventNames=[Clock].DoReport
        Report ReportBoth: EventNames=[Clock].DoReport
          VariableNames=([Row].Irrigation.IrrigationApplied*[Row].Width + [Alley].Irrigation.IrrigationApplied*[Alley].Width)/([Row].Width + [Alley].Width) as WeightedAverage_IrrigationApplied
        Report Drainage: EventNames=[Clock].DoReport
          VariableNames:
            [Clock].Today
            sum of [Soil].SoilWater.Flux[6] from 2008-10-01 to 2011-03-08 as drainage
            [Soil].Water.MM[9] + [Soil].Water.MM[10] as SW_belowRoots
        Soil: Latitude=0; Longitude=0
          LayerStructure: Thickness=[200, 200, 200, 200, 200, 200, 300, 300, 400, 800]
          Chemical: Thickness=[100, 200, 300, 300, 300, 300]; PH=[6.6, 6.2, 5.7, 5.5, 5.5, 5.5]; PHUnits=Water
          Water: Thickness=[300, 300, 300, 300, 300, 300, 1200]; InitialValues=[0.4, 0.4, 0.4, 0.46, 0.45, 0.43, 0.43]; InitialPAWmm=663; RelativeTo=LL15; FilledFromTop=false
          WaterBalance SoilWater: same as PatternTest.PatternsTest.Row.Soil.SoilWater
          Organic: same as PatternTest.PatternsTest.Alley.Soil.Organic
          CERESSoilTemperature Temperature
          OutputLayers: Thickness=[300, 300, 300, 300, 300, 300]
          Solute NO3: same as PatternTest.PatternsTest.Row.Soil.NO3
          Solute NH4: same as PatternTest.PatternsTest.Row.Soil.NH4
          Solute Urea: same as PatternTest.PatternsTest.Row.Soil.Urea
          Physical: same as NZ Experiments.Apple_Dwarf.Row.Soil.Physical
          Nutrient
        SurfaceOrganicMatter: InitialResidueName=wheat_stubble; InitialResidueType=wheat; InitialResidueMass=500; InitialStandingFraction=0; InitialCPR=0; InitialCNR=100
        Fertiliser
        Irrigation
        Manager AgrgateZoneVariables: same as NZ Experiments.Apple_Dwarf.Row.AgrgateZoneVariables
        Operations: same as NZ Experiments.Apple_Dwarf.Row.Operations
        Manager WaterTable: same as NZ Experiments.Apple_Dwarf.Row.WaterTable
        Manager DAS: same as NZ Experiments.Manawatu_1994.Manawatu_94.Row.DAS
        Plant SPRUM
        SprumPasture BasePasture: PotentialGrowthRate=0.9; MaxRootDepth=600; RootThyNeighbour=true; RootNConc=0.01; LeafNConc=0.05; ResidueNConc=0.01; GSMax=0.004; R50=150; LegumePropn=0
        BiomassRemovalEvents OnCut: same as PatternTest.PatternsTest.Alley.OnCut
      Memo Reason why drainage looks bad
        The flux meters were flooded by a rising water table so the drainage observations are not representative of actual drainage
    Simulation Apple_Tall
      Clock: Start=2009-07-01; End=2011-07-01
      Summary SummaryFile
      Weather: FileName=Whakatu.met
      MicroClimate: a_interception=0; b_interception=1; c_interception=0; d_interception=0; SoilHeatFluxFraction=0.4; MinimumHeightDiffForNewLayer=0; NightInterceptionFraction=0.5; ReferenceHeight=2
      SoilArbitrator Soil Arbitrator
      RectangularZone Row: Length=100; Width=1.3; Slope=0; AspectAngle=0; Altitude=50
        Report RowZoneReport: EventNames=[Clock].DoReport
        Report Drainage: EventNames=[Clock].DoReport
          VariableNames:
            [Clock].Today
            sum of [Soil].SoilWater.Flux[7] from 2008-10-01 to 2010-07-23 as drainage
        Soil: Latitude=0; Longitude=0
          LayerStructure: Thickness=[200, 200, 200, 200, 200, 200, 400, 400, 400, 600]
          Chemical: Thickness=[100, 200, 300, 300, 300, 300]; PH=[6.6, 6.2, 5.7, 5.5, 5.5, 5.5]; PHUnits=Water
          Water: Thickness=[400, 400, 400, 1800]; InitialValues=[0.34, 0.44, 0.52, 0.52]; InitialPAWmm=628; RelativeTo=LL15; FilledFromTop=false
          Physical
            Thickness  BD   AirDry  LL15  DUL   SAT
            400        1    0.09    0.18  0.34  0.46
            400        1    0.24    0.24  0.44  0.55
            400        0.8  0.3     0.3   0.52  0.6
            300        0.8  0.3     0.3   0.52  0.6
            100        0.8  0.3     0.3   0.52  0.6
            100        0.8  0.3     0.3   0.52  0.6
            1300       0.8  0.3     0.3   0.52  0.6
            SoilCrop STRUMSoil: LL=[0.18, 0.24, 0.3, 0.3, 0.3, 0.3, 0.3]; KL=[1, 1, 1, 1, 1, 1, 1]; XF=[1, 1, 1, 1, 1, 1, 1]
            SoilCrop SPRUMSoil: LL=[0.18, 0.24, 0.3, 0.3, 0.3, 0.3, 0.3]; KL=[0.11, 0.11, 0.11, 0.11, 0.11, 0.11, -]; XF=[1, 1, 1, 1, 1, 1, -]
          WaterBalance SoilWater: SummerDate=1-Nov; SummerU=9; SummerCona=4.4; WinterDate=1-Apr; WinterU=9; WinterCona=4.4; DiffusConst=88; DiffusSlope=35.4; Salb=0.3; CN2Bare=68; CNRed=20; CNCov=0.8; DischargeWidth=0; CatchmentArea=0; PSIDul=-100
            Thickness  SWCON  KLAT
            150        0.55   0
            150        0.55   0
            100        0.55   0
            200        0.55   0
            200        0.55   0
            200        0.55   0
            200        0.55   0
            200        0.55   0
            200        0.55   0
            200        0.55   0
            200        0.55   0
            200        0.55   0
            400        0.55   0
          Organic: same as PatternTest.PatternsTest.Alley.Soil.Organic
          CERESSoilTemperature Temperature
          OutputLayers: Thickness=[400, 400, 400, 400]
          Solute NO3: Thickness=[100, 200, 300, 300, 300, 300]; InitialValues=[217, 15, 1.66667, 1.78571, 0, 0]; InitialValuesUnits=ppm; WaterTableConcentration=0; D0=0; DepthConstant=0; MaxDepthSoluteAccessible=0; RunoffEffectivenessAtMovingSolute=0; MaxEffectiveRunoff=0
          Solute NH4: same as PatternTest.PatternsTest.Row.Soil.NH4
          Solute Urea: same as PatternTest.PatternsTest.Row.Soil.Urea
          Nutrient
        SurfaceOrganicMatter: InitialResidueName=wheat_stubble; InitialResidueType=wheat; InitialResidueMass=500; InitialStandingFraction=0; InitialCPR=0; InitialCNR=100
        Fertiliser
        Irrigation
        Operations
          2008-09-13  [Irrigation].apply(15)
          2008-10-05  [Irrigation].apply(5)
          2008-10-06  [Irrigation].apply(6)
          2008-11-10  [Irrigation].apply(15)
          2008-10-18  [Irrigation].apply(16)
          2008-10-22  [Irrigation].apply(2)
          2008-10-25  [Irrigation].apply(12)
          2008-11-01  [Irrigation].apply(6)
          2008-11-10  [Irrigation].apply(15)
          2008-11-14  [Irrigation].apply(15)
          2008-11-20  [Irrigation].apply(15)
          2008-11-26  [Irrigation].apply(12)
          2008-12-01  [Irrigation].apply(2)
          2008-12-02  [Irrigation].apply(15)
          2008-12-08  [Irrigation].apply(15)
          2008-12-13  [Irrigation].apply(9)
          2009-12-18  [Irrigation].apply(20)
          2008-12-24  [Irrigation].apply(16)
          2008-12-31  [Irrigation].apply(8)
          2009-01-03  [Irrigation].apply(15)
          2009-01-11  [Irrigation].apply(15)
          2009-01-23  [Irrigation].apply(15)
          2009-02-12  [Irrigation].apply(18)
          2009-02-16  [Irrigation].apply(12)
          2009-02-20  [Irrigation].apply(7)
          2009-03-01  [Irrigation].apply(50)
          2009-03-22  [Irrigation].apply(25)
          2009-12-16  [Irrigation].apply(15)
          2009-12-21  [Irrigation].apply(18)
          2009-12-26  [Irrigation].apply(18)
          2010-01-03  [Irrigation].apply(20)
          2010-01-08  [Irrigation].apply(20)
          2010-03-28  [Irrigation].apply(30)
          2010-10-27  [Irrigation].apply(15)
          2010-11-25  [Irrigation].apply(15)
          2010-12-06  [Irrigation].apply(20)
          2010-12-12  [Irrigation].apply(15)
          2010-12-26  [Irrigation].apply(20)
          2011-01-01  [Irrigation].apply(20)
          2011-01-17  [Irrigation].apply(20)
          2011-02-07  [Irrigation].apply(20)
          2011-02-16  [Irrigation].apply(20)
          2011-03-16  [Irrigation].apply(20)
        Manager WaterTable: same as NZ Experiments.Apple_Dwarf.Row.WaterTable
        Manager AgrgateZoneVariables: same as NZ Experiments.Apple_Dwarf.Row.AgrgateZoneVariables
        StrumTreeInstance Apple: AgeAtSimulationStart=6; YearsToMaxDimension=6; TrunkMassAtMaxDimension=12; BudBreakDAWS=70; StartFullCanopyDAWS=125; StartLeafFallDAWS=260; EndLeafFallDAWS=280; MaxRD=3000; RootThyNeighbour=true; CanopyBaseHeight=1000; MaxPrunedHeight=2800; SeasonalHeightGrowth=700; MaxPrunedWidth=1300; SeasonalWidthGrowth=300; RootNConc=0.01; LeafNConc=0.02; TrunkNConc=0.01; FruitNConc=0.02; ExtinctCoeff=0.8; MaxLAI=8; GSMax=0.004; R50=100; Number=50; Size=70; Density=0.75; DMC=0.14; DAWSMaxBloom=60; DAWSLinearGrowth=150; DAWSMaxSize=300
        Plant STRUM
        Manager DAS: same as NZ Experiments.Manawatu_1994.Manawatu_94.Row.DAS
      RectangularZone Alley: Length=100; Width=2.2; Slope=0; AspectAngle=0; Altitude=50
        Report AlleyZoneReport: EventNames=[Clock].DoReport
        Report Drainage: EventNames=[Clock].DoReport
          VariableNames:
            [Clock].Today
            sum of [Soil].SoilWater.Flux[7] from 2008-10-01 to 2010-07-23 as drainage
        Soil: Latitude=0; Longitude=0
          LayerStructure: Thickness=[200, 200, 200, 200, 200, 200, 400, 400, 400, 600]
          Chemical: Thickness=[100, 200, 300, 300, 300, 300]; PH=[6.6, 6.2, 5.7, 5.5, 5.5, 5.5]; PHUnits=Water
          Water: Thickness=[400, 400, 400, 1800]; InitialValues=[0.34, 0.44, 0.52, 0.52]; InitialPAWmm=628; RelativeTo=LL15; FilledFromTop=false
          Physical
            Thickness  BD   AirDry  LL15  DUL   SAT
            400        1    0.09    0.18  0.34  0.46
            400        1    0.24    0.24  0.44  0.55
            400        0.8  0.3     0.3   0.52  0.6
            300        0.8  0.3     0.3   0.52  0.6
            100        0.8  0.3     0.3   0.52  0.6
            100        0.8  0.3     0.3   0.52  0.6
            1300       0.8  0.3     0.3   0.52  0.6
            SoilCrop STRUMSoil: LL=[0.18, 0.24, 0.3, 0.3, 0.3, 0.3, 0.3]; KL=[1, 1, 1, 1, 1, 1, 1]; XF=[1, 1, 1, 1, 1, 1, 1]
            SoilCrop SPRUMSoil: LL=[0.18, 0.24, 0.3, 0.3, 0.3, 0.3, 0.3]; KL=[0.11, 0.11, 0.11, 0.11, 0.11, 0.11, 0.11]; XF=[1, 1, 1, 1, 1, 1, 1]
          WaterBalance SoilWater: same as NZ Experiments.Apple_Tall.Row.Soil.SoilWater
          Organic: same as PatternTest.PatternsTest.Alley.Soil.Organic
          CERESSoilTemperature Temperature
          OutputLayers: Thickness=[400, 400, 400, 400]
          Solute NO3: same as NZ Experiments.Apple_Tall.Row.Soil.NO3
          Solute NH4: same as PatternTest.PatternsTest.Row.Soil.NH4
          Solute Urea: same as PatternTest.PatternsTest.Row.Soil.Urea
          Nutrient
        SurfaceOrganicMatter: InitialResidueName=wheat_stubble; InitialResidueType=wheat; InitialResidueMass=500; InitialStandingFraction=0; InitialCPR=0; InitialCNR=100
        Plant SPRUM
        Fertiliser
        Irrigation
        Manager PastureInitialisation
          CultivarName = StaticCrop
          InitialRootDepth = 2000
          SowingDate = 07/01/2009 00:00:00
          RootDepth = 2000
          RFV = 10
          KLReductionFactor = -0.001
          KLReductionDepth = 150
          MaxG = 0.004
          R50 = 150
```csharp
using Models.Interfaces;
using Models.PMF.Organs;
using System;
using Models.Core;
using Models.PMF;
using APSIM.Shared.Utilities;
using Models.Soils;
        
namespace Models
{
    [Serializable] 
    [System.Xml.Serialization.XmlInclude(typeof(Model))]
    public class Script : Model
    {
        [Link] private Plant SPRUM;
        [Link] private Clock Clock;
        [Link] private Soil Soil;
        [Link] private Zone zone;
        [Link(Type = LinkType.Path, Path = "[SPRUM].Root")]
        private Root root;
        [Link]
        private IPhysical soilPhysical;

        [Display(Type = DisplayType.CultivarName)]
        [Description("Plant Type")]
        public string CultivarName { get; set; }
        [Description("Initial Root Depth")]
        public double InitialRootDepth { get; set; }
        [Description("Initialisation Date")]
        public DateTime SowingDate { get; set; }
        [Description("Maximum Root Depth")]
        public double RootDepth { get; set; }
        [Description("Roof Front Velocity")]
        public double RFV { get; set; }
        [Description("Factor to change Kl modifier with Depth")]
        public double KLReductionFactor { get; set; }
        [Description("Depth that KL starts to decline")]
        public double KLReductionDepth { get; set; }
        
        public double[] YKLModifiers { get; set; }
        public double[] XDepth { get; set; }
        private double Depth { get; set; }
        
        [Description("Maximum Stomatal Conductance")]
        public double MaxG { get; set; }
        [Description("Stomatal Radn response")]
        public double R50 { get; set; }
        
        [EventSubscribe("DoManagement")]
        private void OnDoManagement(object sender, EventArgs e)
        {
            if (Clock.Today.Date == SowingDate)
            {
                SPRUM.Sow(cultivar: CultivarName, population: 1, depth: InitialRootDepth, rowSpacing: 150);
                
                YKLModifiers = new double[soilPhysical.Thickness.Length];
                XDepth = new double[soilPhysical.Thickness.Length];
                Depth = 0;
                for (int layer = 0; layer < soilPhysical.Thickness.Length; layer++)
                {
                    Depth += soilPhysical.Thickness[layer] / 2;  //Add half of the thickness of the current layer so depth is the mid depth of that layer
                    if (Depth <= KLReductionDepth)
                    {
                        YKLModifiers[layer] = 1;
                        XDepth[layer] = Depth;
                    }
                    else
                    {
                        double KLMod = 1 * Math.Exp(-KLReductionFactor * (Depth - KLReductionDepth));
                        YKLModifiers[layer] = KLMod;
                        XDepth[layer] = Depth;
                    }
                    Depth += soilPhysical.Thickness[layer] / 2;  //Add the other half of the current layer so depth is the top of the next layer
                }
                object KLMods = YKLModifiers;
                zone.Set("SPRUM.Root.KLModifier.XYPairs.Y", KLMods);
                object Depths = XDepth;
                zone.Set("SPRUM.Root.KLModifier.XYPairs.X", Depths);
                object RD = RootDepth;
                zone.Set("SPRUM.Root.MaximumRootDepth.FixedValue", RD);
                object RV = RFV;
                zone.Set("SPRUM.Root.RootFrontVelocity.Potential.FixedValue", RV);
                object GMaxValue = MaxG;
                zone.Set("SPRUM.Leaf.Gsmax350", GMaxValue); 
                object R50Value = R50; 
                zone.Set("SPRUM.Leaf.R50", R50Value); 
                
            }
        }
    }
}
```
        Manager SetPastureVariables
          Ext_coef = 0.6
          MaximumHeight = 200
          MinimumHeight = 50
```csharp
using Models.Soils;
using System.Data;
using APSIM.Shared.Utilities;
using System.Xml.Serialization;
using Models;
using Models.PMF;
using System.Text;
using System.Collections.Generic;
using Models.Core;
using System;
using Models.Climate;

namespace Models
{
    [Serializable] 
    //[System.Xml.Serialization.XmlInclude(typeof(Model))]
    public class Script : Model
    {
        [Link] Plant SPRUM;
        [Link] Clock Clock;
        [Link] Zone zone;
        [Link] Weather weather;

        
        [Description("Extinction coefficient")]
        public  double Ext_coef { get; set; }
        [Description("Maximum height of leaves")]
        public double MaximumHeight { get; set; }
        [Description("Minimum height of leaves")]
        public double MinimumHeight { get; set; }
        
        public double Cover {get; private set;}
        public double LAI { get; private set; }
                
        [EventSubscribe("StartOfSimulation")]
        private void OnStartOfSimulation(object sender, EventArgs e)
        {
            Cover = 0.5;
        }
        
        [EventSubscribe("StartOfDay")]
        private void OnStartOfDay(object sender, EventArgs e)
        {
            Cover += weather.MeanT * 0.0005;

            if (Cover >= 1.0)
            {
                Cover = 0.75;        
            }

              LAI = Math.Log(1 - Cover) / -Ext_coef;

            object LAIResetValue = LAI;
            zone.Set("SPRUM.Leaf.Area.FixedValue", LAIResetValue);  
            object HeightResetValue = MinimumHeight + Cover * (MaximumHeight-MinimumHeight);
            zone.Set("SPRUM.Leaf.HeightFunction.FixedValue", HeightResetValue);  
        }
    }
}
```
        Manager SetupPastureRootZones
          UseExtraZone = False
```csharp
using Models.Soils;
using Models.Functions;
using APSIM.Shared.Utilities;
using System.Xml.Serialization;
using Models;
using Models.PMF;
using System.Text;
using System.Collections.Generic;
using Models.Core;
using System;
using Models.PMF.Organs;

namespace Models
{
    [Serializable] 
    public class Script : Model
    {
        [Link] private Plant SPRUM;
        [Link] private Clock Clock;
        [Link] private Zone zone;
        [Link(Type = LinkType.Path, Path = "[SPRUM].Root")]
        private Root root;

        [Description("Use extra root zone")]
        public bool UseExtraZone { get; set; }

        
        [EventSubscribe("StartOfSimulation")]
        private void OnSimulationCommencing(object sender, EventArgs e)
        {
            if (UseExtraZone)
            {
            root.ZoneNamesToGrowRootsIn.Add("Row");
            root.ZoneRootDepths.Add(600);
NutrientPoolFunctions InitialDM = new NutrientPoolFunctions();
Constant InitStruct = new Constant();
InitStruct.FixedValue = 10;
InitialDM.Structural = InitStruct;
Constant InitMetab = new Constant();
InitMetab.FixedValue = 0;
InitialDM.Metabolic = InitMetab;
Constant InitStor = new Constant();
InitStor.FixedValue = 0;
InitialDM.Storage = InitStor;
            root.ZoneInitialDM.Add(InitialDM);

            }
        }
    }
}
```
        Manager WaterTable: same as NZ Experiments.Apple_Dwarf.Row.WaterTable
        Manager AgrgateZoneVariables: same as NZ Experiments.Apple_Dwarf.Row.AgrgateZoneVariables
        Manager DAS: same as NZ Experiments.Manawatu_1994.Manawatu_94.Row.DAS
      Memo Reason why drainage looks bad
        The flux meters were flooded by a rising water table so the drainage observations are not representative of actual drainage
  Folder USA Experiments
    Experiment Prosser_Apple_Deep
      Memo ExperimentDescription
        *	Based on Ebel e al (2001) - HORTSCIENCE, VOL. 36(7)

        *	Trial site: Roza irrigation district in the lower Yakima valley near Prosser, Wash. (lat. 45°N; long. 119°W and 380 m above sea level)

        *	Soil: Warden fine sandy loam (coarse, silty, mixed, mesic, Xerollic Camborthids) that was uniform down the profile and overlaid fractured basalt bedrock

        *	The permanent wilting and field capacity were 8% (80 mm·m–1) and 28% (280 mm·m–1) by volume, respectively - total available soil water was 200 mm·m–1 for the two orchards.

        *	The shallow soil (mean depth = 0.8 m) and deeper soil (average depth = 1.2 m) had 160 and 240 mm of total water available at field capacity (FC), respectively.

        *	Irrigation treatments: withholding irrigation all season or from 3, 5, 7, 9, 11, 13, 15 or 17 weeks before harvest.

        *	Total pan evaporation was 1005 mm and precipitation was negligible from May through September.
      Memo Apples in this region
        *	Apples grown in Washington, e.g. Red/Golden Delicious, Gala, and Granny Smith, are in season from August to early November.

        *	Apple trees in Washington should be sown in early spring.
      Factors
        Permutation
          Factor Soil
            CompositeFactor _: Specifications=[Soil]
              Soil: Latitude=0; Longitude=0
                LayerStructure: Thickness=[200, 200, 200, 200, 200, 200, 300, 300, 400, 800]
                Chemical: Thickness=[100, 200, 300, 300, 300, 300]; PH=[6.6, 6.2, 5.7, 5.5, 5.5, 5.5]; PHUnits=Water
                Water: Thickness=[300, 300, 300, 300, 300, 300, 1200]; InitialValues=[0.28, 0.28, 0.28, 0.28, 0.015, 0.015, 0.015]; InitialPAWmm=249; RelativeTo=LL15; FilledFromTop=false
                Physical
                  Thickness  BD  AirDry  LL15  DUL    SAT   KS
                  300        1   0.04    0.08  0.28   0.35  100
                  300        1   0.08    0.08  0.28   0.35  100
                  300        1   0.08    0.08  0.28   0.35  50
                  300        1   0.08    0.08  0.28   0.35  40
                  300        1   0.01    0.01  0.015  0.02  10
                  300        1   0.01    0.01  0.015  0.02  1
                  1200       1   0.01    0.01  0.015  0.02  0
                  SoilCrop STRUMSoil: LL=[0.04, 0.08, 0.08, 0.08, 0.01, 0.01, 0.01]; KL=[0.05, 0.05, 0.05, 0.05, 0.05, 0.05, 0.05]; XF=[1, 1, 1, 1, 1, 1, 1]
                  SoilCrop SPRUMSoil: LL=[0.04, 0.08, 0.08, 0.08, 0.01, 0.01, 0.01]; KL=[0.05, 0.05, 0.05, 0.05, 0.05, 0.05, 0.05]; XF=[1, 1, 1, 1, 1, 1, 1]
                WaterBalance SoilWater: same as PatternTest.PatternsTest.Row.Soil.SoilWater
                Organic: same as PatternTest.PatternsTest.Alley.Soil.Organic
                CERESSoilTemperature Temperature
                OutputLayers: Thickness=[200, 200, 200, 200, 200, 200, 200, 200]
                Solute NO3: Thickness=[100, 200, 300, 300, 300, 300]; InitialValues=[217, 15, 1.667, 1.667, 0, 0]; InitialValuesUnits=ppm; WaterTableConcentration=0; D0=0; DepthConstant=0; MaxDepthSoluteAccessible=0; RunoffEffectivenessAtMovingSolute=0; MaxEffectiveRunoff=0
                Solute NH4: same as PatternTest.PatternsTest.Row.Soil.NH4
                Solute Urea: same as PatternTest.PatternsTest.Row.Soil.Urea
                Nutrient
            Memo Notes
              ### Notes about this factor

              _Rogerio Cichota_

              Eyre_23a3 is a Weathered Orthic Recent soil
              Darnley_4a2 is a Typic Argillic Pallic Soil
              Waikiwi_33a2 is a Typic Firm Brown Soil
              Windermere_16a1 is a Mellow Humic Organic Soil
              Patua_10a1 is a Typic Impeded Allophanic Soil

              ==========================================================================================

              **Summmaries, selected properties**

              | SoilName | RootingDepth | BD_TopLayer | BDMax_AnyLayer | PAW_Top100cm | PAW_Total | KSat_TopLayer | KSatMin_AnyLayer | Carbon_TopLayer | CN2Bare | CNReduction |
              |:-------- | ------------:| -----------:| --------------:| ------------:| ---------:| -------------:| ----------------:| ---------------:| -------:| -----------:|
              |          |         (mm) |     (kg/m³) |        (kg/m³) |         (mm) |      (mm) |        (mm/h) |           (mm/h) |             (%) |     (-) |         (-) |
              | Eyre_23a3 | 710 | 0.841 | 0.841 | 53.5 | 79.5 | 1440 | 1440 | 2.97 | 99.0 | 39.0 |
              | Darnley_4a2 | 700 | 1.254 | 1.388 | 102.0 | 160.0 | 1440 | 1.2 | 3.90 | 89.0 | 20.0 |
              | Waikiwi_33a2 | 2000 | 1.189 | 1.441 | 156.5 | 295.5 | 1440 | 192 | 4.78 | 88.0 | 20.0 |
              | Windermere_16a1 | 2000 | 0.300 | 1.476 | 242.3 | 391.3 | 960 | 192 | 28.65 | 90.0 | 16.0 |
              | Patua_10a1 | 800 | 0.801 | 0.801 | 127.5 | 207.5 | 1920 | 960 | 10.00 | 92.0 | 18.0 |
              | Templeton_1a2 | 2000 | 1.332 | 1.693 | 171.3 | 328.3 | 1440 | 24 | 3.72 | 88.0 | 20.0 |
              | Flaxton_4a1 | 2000 | 1.186 | 1.414 | 171.2 | 405.2 | 1440 | 24 | 5.43 | 93.0 | 16.0 |
          Factor Irr: Specification=[IrrigationOperations]
            Operations 0
            Operations 1
              1986-06-01  [Irrigation].Apply(70);
            Operations 2
              1986-06-01  [Irrigation].Apply(70);
              1986-06-15  [Irrigation].Apply(70);
            Operations 3
              1986-06-01  [Irrigation].Apply(70);
              1986-06-15  [Irrigation].Apply(70);
              1986-06-29  [Irrigation].Apply(70);
            Operations 4
              1986-06-01  [Irrigation].Apply(70);
              1986-06-15  [Irrigation].Apply(70);
              1986-06-29  [Irrigation].Apply(70);
              1986-07-13  [Irrigation].Apply(70);
            Operations 5
              1986-06-01  [Irrigation].Apply(70);
              1986-06-15  [Irrigation].Apply(70);
              1986-06-29  [Irrigation].Apply(70);
              1986-07-13  [Irrigation].Apply(70);
              1986-07-27  [Irrigation].Apply(70);
            Operations 6
              1986-06-01  [Irrigation].Apply(70);
              1986-06-15  [Irrigation].Apply(70);
              1986-06-29  [Irrigation].Apply(70);
              1986-07-13  [Irrigation].Apply(70);
              1986-07-27  [Irrigation].Apply(70);
              1986-08-10  [Irrigation].Apply(70);
            Operations 7
              1986-06-01  [Irrigation].Apply(70);
              1986-06-15  [Irrigation].Apply(70);
              1986-06-29  [Irrigation].Apply(70);
              1986-07-13  [Irrigation].Apply(70);
              1986-07-27  [Irrigation].Apply(70);
              1986-08-10  [Irrigation].Apply(70);
              1986-08-24  [Irrigation].Apply(70);
            Operations 8: same as NZ Experiments.Manawatu_1994.Manawatu_94.Row.IrrigationOperations
      Simulation DeepSoil
        Clock: Start=1986-05-01; End=1986-11-28
        Summary SummaryFile
        Weather: FileName=Pendleton.met
        MicroClimate: a_interception=0; b_interception=1; c_interception=0; d_interception=0; SoilHeatFluxFraction=0.4; MinimumHeightDiffForNewLayer=0; NightInterceptionFraction=0.5; ReferenceHeight=2
        SoilArbitrator Soil Arbitrator
        RectangularZone Row: Length=100; Width=1.5; Slope=0; AspectAngle=0; Altitude=50
          Report RowZoneReport: EventNames=[Clock].DoReport
          Report BothZoneReport: EventNames=[Clock].DoReport
            VariableNames=([Row].Irrigation.IrrigationApplied*[Row].Width + [Alley].Irrigation.IrrigationApplied*[Alley].Width)/([Row].Width + [Alley].Width) as WeightedAverage_IrrigationApplied
          Soil: Latitude=0; Longitude=0
            LayerStructure: Thickness=[200, 200, 200, 200, 200, 200, 100]
            Chemical: Thickness=[100, 200, 300, 300, 300]; PH=[6.6, 6.2, 5.7, 5.5, 5.5]; PHUnits=Water
            Water: Thickness=[300, 300, 300, 300, 100]; InitialValues=[0.497, 0.356, 0.145, 0.092, 0.092]; InitialPAWmm=98.1; RelativeTo=LL15; FilledFromTop=true
            Physical
              Thickness  ParticleSizeClay  ParticleSizeSand  ParticleSizeSilt  BD     AirDry  LL15   DUL    SAT    KS
              300        17.5              35                47.5              0.801  0.116   0.232  0.497  0.607  100
              300        22.5              35                42.5              0.765  0.191   0.294  0.447  0.621  100
              300        5                 85                10                0.575  0.145   0.145  0.274  0.45   50
              300        5                 85                10                0.369  0.092   0.092  0.172  0.266  40
              100        5                 85                10                0.369  0.092   0.092  0.172  0.266  0.001
              SoilCrop STRUMSoil: LL=[0.2, 0.2, 0.2, 0.2, 0]; KL=[0.1, 0.1, 0.1, 0.1, 0.1]; XF=[1, 1, 1, 1, 0]
              SoilCrop SPRUMSoil: LL=[0.2, 0.2, 0.2, 0.2, 0]; KL=[0.1, 0.1, 0.1, 0.1, 0.1]; XF=[1, 1, 1, 1, 0]
            WaterBalance SoilWater: SummerDate=1-Nov; SummerU=9; SummerCona=4.4; WinterDate=1-Apr; WinterU=9; WinterCona=4.4; DiffusConst=88; DiffusSlope=35.4; Salb=0.3; CN2Bare=68; CNRed=20; CNCov=0.8; DischargeWidth=0; CatchmentArea=0; PSIDul=-100
              Thickness  SWCON  KLAT
              300        0.55   0
              300        0.55   0
              300        0.55   0
              300        0.55   0
              100        0.1    0
            Organic: FOMCNRatio=30; CarbonUnits=Total
              Thickness  Carbon  SoilCNRatio  FBiom  FInert  FOM
              100        1.82    11.5         0.025  0.3     1243.931
              200        1.47    11.5         0.025  0.4     833.832
              300        1.2     11.5         0.015  0.75    457.617
              300        1.03    11.5         0.01   0.9     251.145
              300        0.47    11.5         0.01   0.96    137.831
              100        0.47    11.5         0.01   0.96    75.644
            CERESSoilTemperature Temperature
            OutputLayers: Thickness=[200, 200, 200, 200, 200, 200, 200]
            Solute NO3: Thickness=[100, 200, 300, 300, 300]; InitialValues=[117, 15, 1.667, 1.667, 0]; InitialValuesUnits=ppm; WaterTableConcentration=0; D0=0; DepthConstant=0; MaxDepthSoluteAccessible=0; RunoffEffectivenessAtMovingSolute=0; MaxEffectiveRunoff=0
            Solute NH4: Thickness=[100, 200, 300, 300, 300]; InitialValues=[0, 0, 0, 0, 0]; InitialValuesUnits=ppm; WaterTableConcentration=0; D0=0; DepthConstant=0; MaxDepthSoluteAccessible=0; RunoffEffectivenessAtMovingSolute=0; MaxEffectiveRunoff=0
            Solute Urea: Thickness=[100, 200, 300, 300, 300]; InitialValues=[0, 0, 0, 0, 0]; InitialValuesUnits=kg/ha; WaterTableConcentration=0; D0=0; DepthConstant=0; MaxDepthSoluteAccessible=0; RunoffEffectivenessAtMovingSolute=0; MaxEffectiveRunoff=0
            Nutrient
          SurfaceOrganicMatter: InitialResidueName=wheat_stubble; InitialResidueType=wheat; InitialResidueMass=500; InitialStandingFraction=0; InitialCPR=0; InitialCNR=100
          Plant STRUM
          Fertiliser
          Irrigation
          Operations IrrigationOperations: same as NZ Experiments.Manawatu_1994.Manawatu_94.Row.IrrigationOperations
          Manager AgrgateZoneVariables
```csharp
using Models.Climate;
using System;
using Models.Core;
using Models.PMF;
using System.Collections.Generic;
using Models.Soils;
using APSIM.Shared.Utilities;
using Models.Zones;
using Models.PMF.Organs;

namespace Models
{
    [Serializable]
    public class Script : Model
    {
        [Link] private Weather weather;
        private RectangularZone AlleyZone {get; set; }
        private RectangularZone RowZone {get; set;}
        private RectangularZone ThisZone {get; set;}
        private double AreaWidth {get; set;}
        public double TotRadn {get; set;}
        public double FRadInt {get; set;}
        public double ET {get; set;}
        public double ES {get; set;}
        public double PET {get; set;}
        public double LAI {get; set;}
        public double Height {get; set;}
        public double RootDepth {get; set;}
        public double PlantWidth {get; set;}
        public double InterceptedRadiation {get; set;}
        public double TreeRadInt {get; set;}


        [EventSubscribe("StartOfSimulation")]
        private void DoStartOfSimulation(object sender, EventArgs e)
        {
               
               ThisZone = this.Parent.Parent as RectangularZone;
               RowZone = this.Parent.Parent.Parent.FindInScope("Row") as RectangularZone;
               AlleyZone = (RectangularZone)this.Parent.Parent.Parent.FindInScope("Alley") as RectangularZone;
               AreaWidth = AlleyZone.Width + RowZone.Width;
               PlantWidth = 0;
        }
        
        [EventSubscribe("DoReportCalculations")]
        private void OnDoReportCalculations(object sender, EventArgs e)
        {

            if (ThisZone.Name == "Row")
                {
                TreeRadInt = (double)RowZone.Get("STRUM.Leaf.RadiationIntercepted") + (double)RowZone.Get("STRUM.Trunk.EnergyBalance.RadiationInterceptedByDead");
                FRadInt = (TreeRadInt * RowZone.Width)/(weather.Radn * AreaWidth);
                InterceptedRadiation = (double)RowZone.Get("STRUM.Leaf.RadiationIntercepted");
                ET = (double)RowZone.Get("STRUM.Leaf.Transpiration") * RowZone.Width/AreaWidth;
                LAI = (double)RowZone.Get("STRUM.Leaf.LAI");
                Height = (double)RowZone.Get("STRUM.Leaf.Height");
                RootDepth = (double)RowZone.Get("STRUM.Root.Depth");
                PlantWidth = (double)RowZone.Get("STRUM.Leaf.Width");
                }
            else
                {
                FRadInt = ((double)AlleyZone.Get("SPRUM.Leaf.RadiationIntercepted") * AlleyZone.Width)/(weather.Radn * AreaWidth);
                InterceptedRadiation = (double)AlleyZone.Get("SPRUM.Leaf.RadiationIntercepted");
                ET = (double)AlleyZone.Get("SPRUM.Leaf.Transpiration") * ThisZone.Width/AreaWidth;
                LAI = (double)AlleyZone.Get("SPRUM.Leaf.LAI");
                Height = (double)AlleyZone.Get("SPRUM.Leaf.Height");
                RootDepth = (double)AlleyZone.Get("SPRUM.Root.Depth");
                }
            TotRadn = weather.Radn * AreaWidth; 
            ES = (double)ThisZone.Get("Soil.SoilWater.Es") * ThisZone.Width/AreaWidth;
            double PETWidth = Math.Min(Math.Max(PlantWidth,ThisZone.Width),AreaWidth);
            PET = (double)ThisZone.Get("Soil.SoilWater.Eo") * PETWidth/AreaWidth;
        }
    }
}
```
          Operations NitrogenOperations
            1986-05-31  [Fertiliser].Apply(10, [Fertiliser].Types.UreaN, 10);
            1986-06-14  [Fertiliser].Apply(10, [Fertiliser].Types.UreaN, 10);
            1986-06-28  [Fertiliser].Apply(10, [Fertiliser].Types.UreaN, 10);
            1986-07-12  [Fertiliser].Apply(10, [Fertiliser].Types.UreaN, 10);
            1986-07-26  [Fertiliser].Apply(10, [Fertiliser].Types.UreaN, 10);
            1986-08-09  [Fertiliser].Apply(10, [Fertiliser].Types.UreaN, 10);
            1986-08-23  [Fertiliser].Apply(10, [Fertiliser].Types.UreaN, 10);
            1986-09-06  [Fertiliser].Apply(10, [Fertiliser].Types.UreaN, 10);
          StrumTreeInstance WashStateApple: RootThyNeighbour=false
            zero: AgeAtSimulationStart, YearsToMaxDimension, BudBreakDAWS, StartFullCanopyDAWS, StartLeafFallDAWS, EndLeafFallDAWS, Number, DAWSMaxBloom, DAWSLinearGrowth, DAWSMaxSize
        RectangularZone Alley: Length=100; Width=3; Slope=0; AspectAngle=0; Altitude=50
          Report AlleyZoneReport: EventNames=[Clock].DoReport
          Report BothZoneReport: EventNames=[Clock].DoReport
            VariableNames=([Row].Irrigation.IrrigationApplied*[Row].Width + [Alley].Irrigation.IrrigationApplied*[Alley].Width)/([Row].Width + [Alley].Width) as WeightedAverage_IrrigationApplied
          SurfaceOrganicMatter: InitialResidueName=wheat_stubble; InitialResidueType=wheat; InitialResidueMass=500; InitialStandingFraction=0; InitialCPR=0; InitialCNR=100
          Plant SPRUM
          Fertiliser
          Irrigation
          Manager PastureInitialisation
            CultivarName = StaticCrop
            InitialRootDepth = 2000
            SowingDate = 05/01/1986 00:00:00
            RootDepth = 2000
            RFV = 10
            KLReductionFactor = -0.001
            KLReductionDepth = 150
            MaxG = 0.004
            R50 = 150
            script: same as in NZ Experiments.Apple_Tall.Alley.PastureInitialisation
          Manager SetPastureVariables: same as NZ Experiments.Apple_Tall.Alley.SetPastureVariables
          Manager SetupPastureRootZones
            UseExtraZone = True
            script: same as in NZ Experiments.Apple_Tall.Alley.SetupPastureRootZones
          Manager AgrgateZoneVariables: same as USA Experiments.Prosser_Apple_Deep.DeepSoil.Row.AgrgateZoneVariables
          Operations NitrogenOperations: same as NZ Experiments.Manawatu_1994.Manawatu_94.Row.NitrogenOperations
          Soil: Latitude=0; Longitude=0
            LayerStructure: Thickness=[200, 200, 200, 200, 200, 200, 100]
            Chemical: Thickness=[100, 200, 300, 300, 300]; PH=[6.6, 6.2, 5.7, 5.5, 5.5]; PHUnits=Water
            Water: Thickness=[300, 300, 300, 300, 100]; InitialValues=[0.497, 0.356, 0.145, 0.092, 0.092]; InitialPAWmm=98.1; RelativeTo=LL15; FilledFromTop=true
            Physical: same as USA Experiments.Prosser_Apple_Deep.DeepSoil.Row.Soil.Physical
            WaterBalance SoilWater: same as USA Experiments.Prosser_Apple_Deep.DeepSoil.Row.Soil.SoilWater
            Organic: same as USA Experiments.Prosser_Apple_Deep.DeepSoil.Row.Soil.Organic
            CERESSoilTemperature Temperature
            OutputLayers: Thickness=[200, 200, 200, 200, 200, 200, 200]
            Solute NO3: Thickness=[1800]; InitialValues=[3]; InitialValuesUnits=ppm; WaterTableConcentration=0; D0=0; DepthConstant=0; MaxDepthSoluteAccessible=0; RunoffEffectivenessAtMovingSolute=0; MaxEffectiveRunoff=0
              Solute NO3: same as USA Experiments.Prosser_Apple_Deep.DeepSoil.Row.Soil.NO3
            Solute NH4: Thickness=[1800]; InitialValues=[1]; InitialValuesUnits=ppm; WaterTableConcentration=0; D0=0; DepthConstant=0; MaxDepthSoluteAccessible=0; RunoffEffectivenessAtMovingSolute=0; MaxEffectiveRunoff=0
            Solute Urea: Thickness=[1800]; InitialValues=[0]; InitialValuesUnits=ppm; WaterTableConcentration=0; D0=0; DepthConstant=0; MaxDepthSoluteAccessible=0; RunoffEffectivenessAtMovingSolute=0; MaxEffectiveRunoff=0
            Nutrient
          Operations IrrigationOperations: same as NZ Experiments.Manawatu_1994.Manawatu_94.Row.IrrigationOperations
    Experiment Prosser_Apple_Shallow
      Memo ExperimentDescription: same as USA Experiments.Prosser_Apple_Deep.ExperimentDescription
      Memo Apples in this region
        *	Apples grown in Washington, e.g. Red/Golden Delicious, Gala, and Granny Smith, are in season from August to early November.

        *	Apple trees in Washington should be sown in early spring.
      Factors
        Permutation
          Factor Soil
            CompositeFactor _: Specifications=[Soil]
              Soil: Latitude=0; Longitude=0
                LayerStructure: Thickness=[200, 200, 200, 200, 200, 200, 300, 300, 400, 800]
                Chemical: Thickness=[100, 200, 300, 300, 300, 300]; PH=[6.6, 6.2, 5.7, 5.5, 5.5, 5.5]; PHUnits=Water
                Water: Thickness=[300, 300, 200, 300, 300, 300, 1200]; InitialValues=[0.28, 0.28, 0.28, 0.015, 0.015, 0.015, 0.015]; InitialPAWmm=170.5; RelativeTo=LL15; FilledFromTop=false
                Physical
                  Thickness  BD  AirDry  LL15  DUL    SAT    KS
                  300        1   0.04    0.08  0.28   0.35   100
                  300        1   0.08    0.08  0.28   0.35   100
                  200        1   0.08    0.08  0.28   0.35   50
                  300        1   0.01    0.01  0.015  0.02   40
                  300        1   0.01    0.01  0.015  0.02   10
                  300        1   0.01    0.01  0.015  0.022  1
                  1200       1   0.01    0.01  0.015  0.02   0
                  SoilCrop STRUMSoil: LL=[0.04, 0.08, 0.08, 0.08, 0.01, 0.01, 0.01]; KL=[0.05, 0.05, 0.05, 0.05, 0.05, 0.05, 0.05]; XF=[1, 1, 1, 1, 1, 1, 1]
                  SoilCrop SPRUMSoil: LL=[0.04, 0.08, 0.08, 0.08, 0, 0, 0]; KL=[0.11, 0.11, 0.11, 0.11, 0.11, 0.11, 0.11]; XF=[1, 1, 1, 1, 1, 1, 1]
                WaterBalance SoilWater: same as PatternTest.PatternsTest.Row.Soil.SoilWater
                Organic: same as PatternTest.PatternsTest.Alley.Soil.Organic
                CERESSoilTemperature Temperature
                OutputLayers: Thickness=[200, 200, 200, 200]
                Solute NO3: same as USA Experiments.Prosser_Apple_Deep.Factors.Permutation.Soil._.Soil.NO3
                Solute NH4: same as PatternTest.PatternsTest.Row.Soil.NH4
                Solute Urea: same as PatternTest.PatternsTest.Row.Soil.Urea
                Nutrient
            Memo Notes: same as USA Experiments.Prosser_Apple_Deep.Factors.Permutation.Soil.Notes
          Factor Irr: same as USA Experiments.Prosser_Apple_Deep.Factors.Permutation.Irr
      Simulation ShallowSoil
        Clock: Start=1986-05-01; End=1986-11-28
        Summary SummaryFile
        Weather: FileName=Pendleton.met
        MicroClimate: a_interception=0; b_interception=1; c_interception=0; d_interception=0; SoilHeatFluxFraction=0.4; MinimumHeightDiffForNewLayer=0; NightInterceptionFraction=0.5; ReferenceHeight=2
        SoilArbitrator Soil Arbitrator
        RectangularZone Row: Length=100; Width=1.5; Slope=0; AspectAngle=0; Altitude=50
          Report RowZoneReport: EventNames=[Clock].DoReport
          Report BothZoneReport: EventNames=[Clock].DoReport
          Report Drainage: EventNames=[Clock].DoReport
            VariableNames:
              [Clock].Today
              sum of [Soil].SoilWater.Flux[6] from 2008-10-01 to 2011-03-08 as drainage
              [Soil].Water.MM[9] + [Soil].Water.MM[10] as SW_belowRoots
          Soil: Latitude=0; Longitude=0
            LayerStructure: Thickness=[200, 200, 200, 200, 200, 200, 100]
            Chemical: Thickness=[100, 200, 300, 300, 300]; PH=[6.6, 6.2, 5.7, 5.5, 5.5]; PHUnits=Water
            Water: Thickness=[300, 300, 300, 300, 100]; InitialPAWmm=0; RelativeTo=LL15; FilledFromTop=false
            Physical: Thickness=[300, 300, 300, 300, 100]
              SoilCrop STRUMSoil
              SoilCrop SPRUMSoil
            WaterBalance SoilWater: same as USA Experiments.Prosser_Apple_Deep.DeepSoil.Row.Soil.SoilWater
            Organic: same as USA Experiments.Prosser_Apple_Deep.DeepSoil.Row.Soil.Organic
            CERESSoilTemperature Temperature
            OutputLayers: Thickness=[200, 200, 200, 200, 200, 200, 200]
            Solute NO3: Thickness=[100, 200, 300, 300, 300]; InitialValues=[217, 15, 1.667, 1.667, 0]; InitialValuesUnits=ppm; WaterTableConcentration=0; D0=0; DepthConstant=0; MaxDepthSoluteAccessible=0; RunoffEffectivenessAtMovingSolute=0; MaxEffectiveRunoff=0
            Solute NH4: Thickness=[100, 200, 300, 300, 300]; InitialValues=[0, 0, 0, 0, 0]; InitialValuesUnits=ppm; WaterTableConcentration=0; D0=0; DepthConstant=0; MaxDepthSoluteAccessible=0; RunoffEffectivenessAtMovingSolute=0; MaxEffectiveRunoff=0
            Solute Urea: Thickness=[100, 200, 300, 300, 300]; InitialValues=[0, 0, 0, 0, 0]; InitialValuesUnits=kg/ha; WaterTableConcentration=0; D0=0; DepthConstant=0; MaxDepthSoluteAccessible=0; RunoffEffectivenessAtMovingSolute=0; MaxEffectiveRunoff=0
            Nutrient
          SurfaceOrganicMatter: InitialResidueName=wheat_stubble; InitialResidueType=wheat; InitialResidueMass=500; InitialStandingFraction=0; InitialCPR=0; InitialCNR=100
          Plant STRUM
          Fertiliser
          Irrigation
          Operations IrrigationOperations: same as NZ Experiments.Manawatu_1994.Manawatu_94.Row.IrrigationOperations
          Manager AgrgateZoneVariables: same as USA Experiments.Prosser_Apple_Deep.DeepSoil.Row.AgrgateZoneVariables
          StrumTreeInstance WashStateApple: same as USA Experiments.Prosser_Apple_Deep.DeepSoil.Row.WashStateApple
        RectangularZone Alley: Length=100; Width=3; Slope=0; AspectAngle=0; Altitude=50
          Report AlleyZoneReport: EventNames=[Clock].DoReport
          Report BothZoneReport: EventNames=[Clock].DoReport
            VariableNames=([Row].Irrigation.IrrigationApplied*[Row].Width + [Alley].Irrigation.IrrigationApplied*[Alley].Width)/([Row].Width + [Alley].Width) as WeightedAverage_IrrigationApplied
          Report Drainage: EventNames=[Clock].DoReport
            VariableNames:
              [Clock].Today
              sum of [Soil].SoilWater.Flux[6] from 1986-06-01 to 1986-09-28 as drainage
              [Soil].Water.MM[9] + [Soil].Water.MM[10] as SW_belowRoots
          Soil: Latitude=0; Longitude=0
            LayerStructure: Thickness=[200, 200, 200, 200, 200, 200, 300, 300, 400, 800]
            Chemical: Thickness=[100, 200, 300, 300, 300, 300]; PH=[6.6, 6.2, 5.7, 5.5, 5.5, 5.5]; PHUnits=Water
            Water: Thickness=[300, 300, 300, 300, 300, 300, 1200]; InitialPAWmm=0; RelativeTo=LL15; FilledFromTop=false
            Physical: Thickness=[300, 300, 300, 300, 300, 300, 1200]
              SoilCrop STRUMSoil
              SoilCrop SPRUMSoil
            WaterBalance SoilWater: same as PatternTest.PatternsTest.Row.Soil.SoilWater
            Organic: same as PatternTest.PatternsTest.Alley.Soil.Organic
            CERESSoilTemperature Temperature
            OutputLayers: Thickness=[300, 300, 300, 300, 300, 300]
            Solute NO3: same as PatternTest.PatternsTest.Row.Soil.NO3
            Solute NH4: same as PatternTest.PatternsTest.Row.Soil.NH4
            Solute Urea: same as PatternTest.PatternsTest.Row.Soil.Urea
            Nutrient
          SurfaceOrganicMatter: InitialResidueName=wheat_stubble; InitialResidueType=wheat; InitialResidueMass=500; InitialStandingFraction=0; InitialCPR=0; InitialCNR=100
          Plant SPRUM
          Fertiliser
          Irrigation
          Manager PastureInitialisation: same as USA Experiments.Prosser_Apple_Deep.DeepSoil.Alley.PastureInitialisation
          Manager SetPastureVariables: same as NZ Experiments.Apple_Tall.Alley.SetPastureVariables
          Manager SetupPastureRootZones: same as NZ Experiments.Apple_Tall.Alley.SetupPastureRootZones
          Manager AgrgateZoneVariables: same as USA Experiments.Prosser_Apple_Deep.DeepSoil.Row.AgrgateZoneVariables
          Operations IrrigationOperations: same as NZ Experiments.Manawatu_1994.Manawatu_94.Row.IrrigationOperations
  Folder NZ_Sensitivity
    Experiment Jervoistown2010Temperature
      Memo Description
        *	Testing for sensitivity
      Factors
        Factor Temperature
          CompositeFactor Minus2: Specifications=[ClimateControl].Script.TempFactor = -2
          CompositeFactor Minus1: Specifications=[ClimateControl].Script.TempFactor = -1
          CompositeFactor Zero: Specifications=[ClimateControl].Script.TempFactor = 0
          CompositeFactor Plus1: Specifications=[ClimateControl].Script.TempFactor = 1
          CompositeFactor Plus2: Specifications=[ClimateControl].Script.TempFactor = 2
      Simulation BlockJ
        Clock: Start=2010-06-01; End=2011-05-31
        Summary SummaryFile
        Weather: FileName=VCS_Jervoistown.met
        MicroClimate: a_interception=0; b_interception=1; c_interception=0; d_interception=0; SoilHeatFluxFraction=0.4; MinimumHeightDiffForNewLayer=0; NightInterceptionFraction=0.5; ReferenceHeight=2
        SoilArbitrator Soil Arbitrator
        Manager AutoIrrigationDeficitBased
          AllowIrrigation = True
          SeasonStart = 1-oct
          SeasonEnd = 1-apr
          depthPAWC = 1000
          triggerDeficit = 70
          irrigateAmount = 15
          returndays = 3
          IrrigateAlley = True
```csharp
using Newtonsoft.Json;
using APSIM.Shared.Utilities;
using System.Xml.Serialization;
using Models.Soils;
using Models.PMF;
using Models.Core;
using System;
using Models.Interfaces;

        
namespace Models
{
    [Serializable] 
    [System.Xml.Serialization.XmlInclude(typeof(Model))]
    public class Script : Model
    {
        [Link] private Clock Clock;
        [Link] private Zone patch;
        [Link] private ISummary summary;
        //[Link] private Irrigation Irrigation;
        [Link] private Soil Soil;
        [Link(IsOptional = true)] private IPlant existingCrop;
        [Link] private IPhysical soilPhysical;
        [Link] private ISoilWater waterBalance;
        [Link(Type = LinkType.Scoped, ByName = true)] private Zone Row;
        [Link(Type = LinkType.Scoped, ByName = true)] private Zone Alley;
       
        // Parameters from user interface
        [Separator("Manager for controlling automatic irrigation")]
        [Description(" Allow this manager to control irrigation?")]
        public bool AllowIrrigation { get; set; }
      
        [Separator(" Parameters for the irrigation system")]
        [Description(" Start of irrigation season (d-mmm)")]
        public string SeasonStart { get; set; }
        [Description(" End of irrigation season (d-mmm)")]
        public string SeasonEnd { get; set; }
        [Description(" Depth to calculate PAWC and deficit (mm)")]
        public double depthPAWC { get; set; }
        [Description(" Deficit to trigger irrigations (% PAWC)")]
        public double triggerDeficit { get; set; }
        [Description(" Irrigation amount to apply each event (mm)")]
        public double irrigateAmount { get; set; }
        [Description(" Minimum days for irrigation to return")]
        public double returndays { get; set; }
        
        [Description("Is the Alley zone irrigated?")]
        public bool IrrigateAlley {get; set;}

        //Class members
        [JsonIgnore] public double IrrigLayerSWDeficit { get; set; }
        [JsonIgnore] public double TopSWC { get; set; }
        [JsonIgnore] public double DaysSinceIrrigation { get; set; }
        [JsonIgnore] public double AmountToApply { get; set; }
        [JsonIgnore] public double SeasonAppliedAmount { get; set; }
        
        private bool IrrigationIsAllowed { get; set; }
        private bool SeasonIsOpen { get; set; }
        private bool CropIsActive { get; set; }
        private bool IrrigatorIsAvailable { get; set; }
        private bool SoilIsDry { get; set; }
        private double TopDUL;
        private double TopLL;
        private int nLayers;

    
        //Calculate static soil variables
        [EventSubscribe("StartOfSimulation")]
        private void OnStartOfSimulation(object sender, EventArgs e)
        {
            
            //Can we irrigate at all?
            IrrigationIsAllowed = false; 
            if (AllowIrrigation)
                IrrigationIsAllowed = true; 

            //Calculate soil water variables
            double depthFromSurface = 0.0;
            double fracLayer = 0.0;
            nLayers = soilPhysical.Thickness.Length;
            for (int layer = 0; layer < nLayers; layer++)
            {
                fracLayer = Math.Min(1.0, (depthPAWC - depthFromSurface) / soilPhysical.Thickness[layer]);
                TopLL += soilPhysical.LL15mm[layer] * fracLayer;
                TopDUL += soilPhysical.DULmm[layer] * fracLayer;
                depthFromSurface += soilPhysical.Thickness[layer];
                if (depthFromSurface >= depthPAWC)
                    layer = nLayers;
            }
        }
             
        //Determine daily requirement for irrigation
        [EventSubscribe("StartOfDay")]
        private void OnStartOfDay(object sender, EventArgs e)
        {
            AmountToApply = 0.0;
            DaysSinceIrrigation += 1;

            //Can we irrigate today?          
            SeasonIsOpen = DateUtilities.WithinDates(SeasonStart, Clock.Today, SeasonEnd);
            if (!SeasonIsOpen)
                SeasonAppliedAmount = 0;

            //Is there a crop in the ground that needs irrigation?
            CropIsActive = false;
            if (existingCrop != null)
            {
                string currentCrop = (string)patch.Get("[CropManagement].Script.CurrentCrop");
                if ( existingCrop.IsAlive)
                {
                    CropIsActive = true;
                }
            }
          
            //Is the irrigator available?
            IrrigatorIsAvailable = false;
            if (DaysSinceIrrigation >= returndays)
                IrrigatorIsAvailable = true;
          
            //Is the soil dry enough to require irrigation?
            SoilIsDry = false;
            double depthFromSurface = 0.0;
            double fracLayer = 0.0;
            TopSWC = 0.0;
            for (int layer = 0; layer < nLayers; layer++)
            //for (int layer = 0; depthFromSurface < depthPAWC + soilPhysical.Thickness[layer]; layer++)
            {
                fracLayer = Math.Min(1.0, (depthPAWC - depthFromSurface) / soilPhysical.Thickness[layer]);
                TopSWC += waterBalance.SWmm[layer] * fracLayer;
                depthFromSurface += soilPhysical.Thickness[layer];
                if (depthFromSurface >= depthPAWC)
                    layer = nLayers;
            }
            
            IrrigLayerSWDeficit = TopSWC - TopDUL;
            if (Math.Max(0.0, -IrrigLayerSWDeficit) >= (TopDUL - TopLL) * (100 - triggerDeficit) / 100)
                SoilIsDry = true;

            //Are all the conditions ratifying irrigation
            if (IrrigationIsAllowed && SeasonIsOpen && CropIsActive && IrrigatorIsAvailable && SoilIsDry)
            {
                //Lets irrigate well !!!!
                Irrigation irrigRow = (Irrigation)Row.Get("Irrigation");
                irrigRow.Apply(irrigateAmount, depth: 0);
                DaysSinceIrrigation = 0;
                if (IrrigateAlley)
                {
                   Irrigation irrigAlley = (Irrigation)Alley.Get("Irrigation");
                   irrigAlley.Apply(irrigateAmount , depth: 0);
                   DaysSinceIrrigation = 0;
            
                }
            }
        }
    }
}
```
        Manager AutomaticFertiliser
          AllowFertiliser = yes
          Depth2SoilN = 500
          CriticalSoilN = 30
          FertNAmount = 50
          FertType = UreaN
          FertApplicationDepth = 10
          FertMinimumDays = 15
```csharp
using Newtonsoft.Json;
using Models.Soils.Nutrients;
using Models.Interfaces;
using System.Xml.Serialization;
using APSIM.Shared.Utilities;
using Models.Soils;
using Models.PMF;
using Models.Core;
using System;

namespace Models
{
    [Serializable]
    public class Script : Model
    {
        [Link] private Clock Clock;
        [Link] private Fertiliser fertiliser;
        [Link] private ISummary summary;
        [Link] private Soil Soil;
        private DateTime lastApplicationDate;
        private bool fertiliserIsAllowed;
        private int nLayers;
        [Link(ByName = true)]
        private ISolute NO3;
        [Link(ByName = true)]
        private ISolute NH4;
        [Link(ByName = true)]
        private ISolute Urea;
        [Link]
        private IPhysical soilPhysical;

        //User inputs from properties tab
        [Description("Turn fertiliser applications on? ")]
        public yesnoType AllowFertiliser { get; set; }
        
        [Description("Depth to calculate available soil N (mm): ")]
        public double Depth2SoilN { get; set; }

        [Description("Minimum available N, triggers an application (kgN/ha): ")]
        public double CriticalSoilN { get; set; }

        [Description("Amount of N fertiliser for each application (kgN/ha): ")]
        public double FertNAmount { get; set; }

        [Description("Type of N fertiliser to apply: ")]
        public Fertiliser.Types FertType { get; set; }

        [Description("Depth at which to apply the fertiliser (mm): ")]
        public double FertApplicationDepth { get; set; }
       
        [Description("Minimum period between applications (days): ")]
        public double FertMinimumDays { get; set; }
       
        public enum yesnoType
        {
            /// <summary>a positive answer</summary>
            yes,
            /// <summary>a negative answer</summary>
            no
        }

        [JsonIgnore] public double TopMineralN { get; set; }
        

        [EventSubscribe("StartOfSimulation")]
        private void OnStartOfSimulation(object sender, EventArgs e)
        {
            fertiliserIsAllowed = (AllowFertiliser == yesnoType.yes);
            nLayers = soilPhysical.Thickness.Length;
        }

        [EventSubscribe("DoManagement")]
        private void OnDoManagement(object sender, EventArgs e)
        {
            double daysSinceLastApplication = (Clock.Today - lastApplicationDate).TotalDays;
            
            // get the N stored in the soil
            double depthFromSurface = 0.0;
            double fracLayer = 0.0;
            TopMineralN = 0.0;
            for (int layer = 0; layer < nLayers; layer++)
            {
                fracLayer = Math.Min(1.0, (Depth2SoilN - depthFromSurface) / soilPhysical.Thickness[layer]);
                TopMineralN += (NO3.kgha[layer]
                + NH4.kgha[layer]
                + Urea.kgha[layer])
                * fracLayer;
                depthFromSurface += soilPhysical.Thickness[layer];
                if (depthFromSurface >= Depth2SoilN)
                    layer = nLayers;
            }

            if (fertiliserIsAllowed && (daysSinceLastApplication >= FertMinimumDays) && (TopMineralN <= CriticalSoilN))
            {
                fertiliser.Apply(FertNAmount, FertType, FertApplicationDepth);
                lastApplicationDate = Clock.Today;
            }
        }
    }
}
```
        Manager ResetDate
          ResetDate = 1-Jun
```csharp
using Newtonsoft.Json;
using Models.PMF.Organs;
using Models.Soils.Nutrients;
using Models.Interfaces;
using System;
using Models.Core;
using System.Collections.Generic;
using System.Text;
using Models.Soils;
using Models.PMF;
using Models;
using System.Xml.Serialization;
using APSIM.Shared.Utilities;
using Models.Climate;



namespace Models
{
    [Serializable] 
    //[System.Xml.Serialization.XmlInclude(typeof(Model))]
    public class Script : Model
    {
    
     [Link] private Clock Clock;
        
    [Separator("Manager to summarise variables")]
        [Description(" Date to end the simulation year and reset: ")]
        public string ResetDate { get; set; }
                  
        [JsonIgnore] public double SimulationYear { get; set; }
        [JsonIgnore] public double DAS { get; set; }
        
         [EventSubscribe("StartOfSimulation")]
        private void DoStartOfSimulation(object sender, EventArgs e)
        {
                DAS = 0;
                SimulationYear = 1971;
        }
        
        [EventSubscribe("StartOfDay")]
        private void OnStartOfDay(object sender, EventArgs e)
        {
            DAS += 1;
            if (DateUtilities.DatesAreEqual(ResetDate, Clock.Today.Date))
            {
                SimulationYear += 1;
                
            }
        }
    
    }
}
```
        Manager ClimateControl
          TempFactor = 0
          StartDate = 06/01/2010 00:00:00
          EndDate = 10/30/2010 00:00:00
```csharp
using Models.Soils;
using System.Xml.Serialization;
using Models;
using Models.PMF;
using System.Text;
using System.Collections.Generic;
using APSIM.Shared.Utilities;
using Models.Core;
using System;
using Models.Climate;

namespace Models
{
    [Serializable] 
    [System.Xml.Serialization.XmlInclude(typeof(Model))]
    public class Script : Model
    {
        [Link] Weather Met;
        [Link] Clock Clock;
    
        [Description("Start Date")]
        public DateTime StartDate { get; set; }
        
        [Description("End Date")]
        public DateTime EndDate { get; set; }

       [Description("Change in temperature")]
        public float TempFactor { get; set; }

 
    
        [EventSubscribe("PreparingNewWeatherData")]
        private void OnPreparingNewWeatherData(object sender, EventArgs e)
        {
         Met.MinT +=  TempFactor;   Met.MaxT +=  TempFactor;    
        
        }
    }
}
```
        RectangularZone Row: Length=100; Width=1.3; Slope=0; AspectAngle=0; Altitude=50
          Report RowZoneReport: EventNames=[Clock].DoReport
          Report BothZoneReport: EventNames=[Clock].DoReport
          Soil: Latitude=0; Longitude=0
            LayerStructure: Thickness=[200, 200, 200, 200, 200, 200, 300, 300, 400, 800]
            Chemical: Thickness=[100, 200, 300, 300, 300, 300]; PH=[6.6, 6.2, 5.7, 5.5, 5.5, 5.5]; PHUnits=Water
            Water: Thickness=[300, 300, 300, 300, 300, 300, 1200]; InitialValues=[0.42, 0.41, 0.5, 0.46, 0.45, 0.43, 0.43]; InitialPAWmm=702; RelativeTo=LL15; FilledFromTop=false
            WaterBalance SoilWater: same as PatternTest.PatternsTest.Row.Soil.SoilWater
            Organic: same as PatternTest.PatternsTest.Alley.Soil.Organic
            CERESSoilTemperature Temperature
            OutputLayers: Thickness=[300, 300, 300, 300, 300, 300]
            Solute NO3: same as PatternTest.PatternsTest.Row.Soil.NO3
            Solute NH4: same as PatternTest.PatternsTest.Row.Soil.NH4
            Solute Urea: same as PatternTest.PatternsTest.Row.Soil.Urea
            Physical: same as NZ Experiments.Apple_Dwarf.Row.Soil.Physical
            Nutrient
          SurfaceOrganicMatter: InitialResidueName=wheat_stubble; InitialResidueType=wheat; InitialResidueMass=500; InitialStandingFraction=0; InitialCPR=0; InitialCNR=100
          Plant STRUM
          StrumTreeInstance Apple: same as NZ Experiments.Manawatu_1997.Manawatu_97.Row.Apple
          Fertiliser
          Irrigation
          Manager AgrgateZoneVariables: same as NZ Experiments.Apple_Dwarf.Row.AgrgateZoneVariables
        RectangularZone Alley: Length=100; Width=2.2; Slope=0; AspectAngle=0; Altitude=50
          Report AlleyZoneReport: EventNames=[Clock].DoReport
          Report BothZoneReport: EventNames=[Clock].DoReport
          Soil: same as NZ Experiments.Apple_Dwarf.Alley.Soil
          SurfaceOrganicMatter: InitialResidueName=wheat_stubble; InitialResidueType=wheat; InitialResidueMass=500; InitialStandingFraction=0; InitialCPR=0; InitialCNR=100
          Plant SPRUM
          Fertiliser
          Irrigation
          Manager SetPastureVariables: same as NZ Experiments.Apple_Tall.Alley.SetPastureVariables
          Manager SetupPastureRootZones
            UseExtraZone = False
```csharp
using Models.Soils;
using Models.Functions;
using APSIM.Shared.Utilities;
using System.Xml.Serialization;
using Models;
using Models.PMF;
using System.Text;
using System.Collections.Generic;
using Models.Core;
using System;
using Models.PMF.Organs;

namespace Models
{
    [Serializable] 
    public class Script : Model
    {
        [Link] private Plant SPRUM;
        [Link] private Clock Clock;
        [Link] private Zone zone;
        [Link(Type = LinkType.Path, Path = "[SPRUM].Root")]
        private Root root;

        [Description("Use extra root zone")]
        public bool UseExtraZone { get; set; }

        
        [EventSubscribe("StartOfSimulation")]
        private void OnSimulationCommencing(object sender, EventArgs e)
        {
            //if (UseExtraZone)
            //{
            root.ZoneNamesToGrowRootsIn.Add("Row");
            root.ZoneRootDepths.Add(600);
            NutrientPoolFunctions InitialDM = new NutrientPoolFunctions();
            Constant InitStruct = new Constant();
            InitStruct.FixedValue = 10;
            InitialDM.Structural = InitStruct;
            Constant InitMetab = new Constant();
            InitMetab.FixedValue = 0;
            InitialDM.Metabolic = InitMetab;
            Constant InitStor = new Constant();
            InitStor.FixedValue = 0;
            InitialDM.Storage = InitStor;
            root.ZoneInitialDM.Add(InitialDM);

            //}
        }
    }
}
```
          Manager AgrgateZoneVariables: same as NZ Experiments.Apple_Dwarf.Row.AgrgateZoneVariables
          Manager PastureInitialisation
            CultivarName = StaticCrop
            InitialRootDepth = 2000
            SowingDate = 1-jun
            RootDepth = 2000
            RFV = 10
            KLReductionFactor = -0.001
            KLReductionDepth = 150
            MaxG = 0.004
            R50 = 150
```csharp
using Models.Interfaces;
using Models.PMF.Organs;
using System;
using Models.Core;
using Models.PMF;
using APSIM.Shared.Utilities;
using Models.Soils;
        
namespace Models
{
    [Serializable] 
    [System.Xml.Serialization.XmlInclude(typeof(Model))]
    public class Script : Model
    {
        [Link] private Plant SPRUM;
        [Link] private Clock Clock;
        [Link] private Soil Soil;
        [Link] private Zone zone;
        [Link(Type = LinkType.Path, Path = "[SPRUM].Root")]
        private Root root;
        [Link]
        private IPhysical soilPhysical;

        [Display(Type = DisplayType.CultivarName)]
        [Description("Plant Type")]
        public string CultivarName { get; set; }
        [Description("Initial Root Depth")]
        public double InitialRootDepth { get; set; }
       [Description("Initialisation Date (d-mmm)")]
        public string SowingDate { get; set; }
        [Description("Maximum Root Depth")]
        public double RootDepth { get; set; }
        [Description("Roof Front Velocity")]
        public double RFV { get; set; }
        [Description("Factor to change Kl modifier with Depth")]
        public double KLReductionFactor { get; set; }
        [Description("Depth that KL starts to decline")]
        public double KLReductionDepth { get; set; }
        
        public double[] YKLModifiers { get; set; }
        public double[] XDepth { get; set; }
        private double Depth { get; set; }
        
        [Description("Maximum Stomatal Conductance")]
        public double MaxG { get; set; }
        [Description("Stomatal Radn response")]
        public double R50 { get; set; }
        
        [EventSubscribe("DoManagement")]
        private void OnDoManagement(object sender, EventArgs e)
        {
            if  (DateUtilities.DatesEqual(SowingDate, Clock.Today))
            {
                SPRUM.Sow(cultivar: CultivarName, population: 1, depth: InitialRootDepth, rowSpacing: 150);
                
                YKLModifiers = new double[soilPhysical.Thickness.Length];
                XDepth = new double[soilPhysical.Thickness.Length];
                Depth = 0;
                for (int layer = 0; layer < soilPhysical.Thickness.Length; layer++)
                {
                    Depth += soilPhysical.Thickness[layer] / 2;  //Add half of the thickness of the current layer so depth is the mid depth of that layer
                    if (Depth <= KLReductionDepth)
                    {
                        YKLModifiers[layer] = 1;
                        XDepth[layer] = Depth;
                    }
                    else
                    {
                        double KLMod = 1 * Math.Exp(-KLReductionFactor * (Depth - KLReductionDepth));
                        YKLModifiers[layer] = KLMod;
                        XDepth[layer] = Depth;
                    }
                    Depth += soilPhysical.Thickness[layer] / 2;  //Add the other half of the current layer so depth is the top of the next layer
                }
                object KLMods = YKLModifiers;
                zone.Set("SPRUM.Root.KLModifier.XYPairs.Y", KLMods);
                object Depths = XDepth;
                zone.Set("SPRUM.Root.KLModifier.XYPairs.X", Depths);
                object RD = RootDepth;
                zone.Set("SPRUM.Root.MaximumRootDepth.FixedValue", RD);
                object RV = RFV;
                zone.Set("SPRUM.Root.RootFrontVelocity.Potential.FixedValue", RV);
                object GMaxValue = MaxG;
                zone.Set("SPRUM.Leaf.Gsmax350", GMaxValue); 
                object R50Value = R50; 
                zone.Set("SPRUM.Leaf.R50", R50Value); 
                
            }
        }
    }
}
```
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