Simulations: Version=173
  Memo TitlePage
    # The STRUM model
    A simple representation of the shape and mass of rows of fruit trees which can be used in a multizone simulation with a row of mown grass to model the water N and C balance of an orchard system.
  Folder Replacements
    Plant STRUM: PlantType=STRUM
      Memo TitlePage
        # STRUM

        This model has been built using the Plant Modelling Framework (PMF) of [brown_plant_2014] to provide a simple representation of perennial tree and vine crops.  Its scope is intended for use in water and nitrogen balance studies where the focus is on soil processes and a very simple crop is adequate.  The model has simple functions for estimating the growht and nitrogen uptake of different organs and anohter simple function for predicting canopy size so water uptake can be predicted.

        The model has currently been parameterised and tested for 4 genotpes; Apple, Kiwifruit, Grape and Peach.

        STRUM has a simple phenology model that breaks the annual growth cycle into 4 phases:

           1. The <b>Dormancy</b> phase when the tree is a bare trunk, using no water, growing no biomass and taking up no Nitrogen
           2. The <b>CanopyExpansion</b> phase which occurs in the spring when the bulk of biomass assimilation is partitioned to the new leaves with smaller proportions going to trunk and root growth
           3. The <b>FruitGrowth</b> phase where the bulk of biomass assimilation is partitioned to the growing fruit with smaller proportions going to leaf, trunk and root growth
           4. The <b>LeafFall</b> phase where any further biomass assimilated is partitioned to the trunk and roots.

        As infered above the STRUM consists of 4 organs:

           1. <b>Leaf</b> which ls represented with the Simpleleaf class and provides estimates of:
            - Leaf area index that the MicroClimate model uses to estimate the radiation of the tree canopy and the grass in the underlying alley
            - Water uptake demand that the soil arbitrator uses to estimate soil water extraction
            - Photosynthesis estimates (Using radiation use efficiency) to drive tree biomass production
            - Biomass demand that is used to grow leaf biomass and determine N demand for leaf growth
           2. <b>Fruit</b> which represents the biomass and nitrogen that may be removed from the orchard each year as harvested product
           3. <b>Trunk</b> which represents the perennial biomass of the trees and will grow a small amount each year but is mostly pruned out at the end of the year and may be returned to the soil surface.
           4. <b>Root</b> which extracts water and nitrogen from the soil for plant growth, grows a small amount of biomass each year and senesesses a proportion of this to the soil.

        #Inclusion in APSIM simulations
        A STRUM crop is included in a simulation the same as any other APSIM crop

         * The STRUM object needs to be dragged or copied from the Crop folder in the tool box into the field of your simulation.
         * It is then planted with a sowing rule
        ~~~
        STRUM.Sow(cultivar: StaticCrop, population: 1, depth: 10, rowSpacing: 150);
        ~~~

          * Note that the SimpleTreeModel has no notion of population or rowSpacing but these parameters are required by the Sow method so filler values are provided
          * `depth` in the Sow arguement is the depth that the crop is sown at.  In most cases the Sow argument is used to initialise an established tree crop so sow depth arguement is used to set the root depth of the trees.  This depth should be set to the rooting depth that is expected as roots will not grow during the simulation.

        #Representing and Orchard System
         * While the STRUM model will run as a stand alone model, in most cases fruit trees and vines are grown in rows with a grass or herb ley growing in the alleys.  As such it is important to set up a simulation with two rectangular zones, one with the fruit tree established within and another with the pasture or herb ley established.  In most cases a SLURP is adequate to represent the energy, water and nitrogen balance of the alleys.
         * As part of the development of this crop model the Microclimate radiation arbitration was improved to be suitable for fruit crop set ups.  This involved modifying the strip crop radiation interception code to allow:
           1. The entire depth of the tallest (tree) canopy to be taller than the grass growing in the alleys
           2. The width of the canopy of the trees to exceed the width of the zone that the trees are planted in so they may intercept more radiation that would be possible if they were kept within the spatial confines of the row zone
        ![Schematic of radiation interception scheme as modeled for tree row crops](RadInt.jpg)

        #Further development requirements
        The greatest effort has been spent on getting the models water balance predictions working to an adequate standard.  This included running an optimisation procedure against the validation data set to obtain the most suitalbe parameters for water extraction parameters (kl pattern through the soil) and water demand parameters (max canopy conductance and conductance response to light) as well as weather the roots of the alley should be allowed to grow sideways into the row.
        The model has been set up to predict biomass accumulation and N uptake but the parameters for this functionality have not be determined from observed or published data so further work is required here.  The rates of senescence of the FruitTree root system and the contribution of the mown grass in the alley to the N and C balance have not yet been established correctly.
        Kl patterns are currently parameterised in a manager script (so they could be optimised) this needs to be moved into model set up.
        Optimisation was not able to give good fits for both row and alley zones for grape suggesting the kl patterns differ between alley and row.  Further investigation is required to better determine spatial water extraction parameters.
      OrganArbitrator Arbitrator
        BiomassTypeArbitrator DMArbitration
          Folder PotentialPartitioningMethods
            ReallocationMethod
            AllocateFixationMethod
            RetranslocationMethod
            SendPotentialDMAllocationsMethod
          Folder AllocationMethods
            NutrientConstrainedAllocationMethod
            DryMatterAllocationsMethod
          RelativeAllocation ArbitrationMethod
        BiomassTypeArbitrator NArbitration
          Folder PotentialPartitioningMethods
            ReallocationMethod
          Folder ActualPartitioningMethods
            AllocateFixationMethod
            RetranslocationMethod
          Folder AllocationMethods
            NitrogenAllocationsMethod
          RelativeAllocation ArbitrationMethod
          AllocateUptakesMethod
        WaterUptakeMethod
        NitrogenUptakeMethod
      Phenology
        Constant ThermalTime: FixedValue=1; Units=days
        GenericPhase ZeroPhase: Start=ModelInitialisation; End=Dormant; IsEmerged=true
          Memo
            It is necessary to have a phase before Dormancy otherwise the rewind doesn't work
          VariableReference Progression: VariableName=[Phenology].ThermalTime
          Constant Target: FixedValue=0; Units=oCd
        DAWSPhase SpringDormancy: Start=Dormant; End=BudBreak; IsEmerged=true; DAWStoProgress=0
        DAWSPhase CanopyExpansion: Start=BudBreak; End=StartFullCanopy; IsEmerged=true; DAWStoProgress=0
        DAWSPhase FullCanopy: Start=StartFullCanopy; End=StartLeafFall; IsEmerged=true; DAWStoProgress=0
        DAWSPhase LeafFall: Start=StartLeafFall; End=BareTree; IsEmerged=true; DAWStoProgress=0
        DAWSPhase WinterDormancy: Start=BareTree; End=SpringDormant; IsEmerged=true; DAWStoProgress=365
        GotoPhase: Start=BareTree; IsEmerged=true; PhaseNameToGoto=SpringDormancy
        Age
        AddFunction AgeDecimal
          VariableReference AgeInt: VariableName=[Phenology].Age
          DivideFunction Decimal
            VariableReference DOY: VariableName=[Weather].DaysSinceWinterSolstice
            Constant DaysInAYear: FixedValue=365
      Root: GrowthRespiration=0; MaintenanceRespiration=0
        RootShapeCylinder RootShape
        DivideFunction RootFrontVelocity
          VariableReference MaxRootDepth: VariableName=[Root].MaximumRootDepth
          MultiplyFunction RootGrowthDuration
            Constant YearsToMaxDepth: FixedValue=0; Units=years
              Memo Param value set at establishment
                STRUM calculates this parameter value during run-time when the crop is established from parameter values set in the relevent STRUMtree object
            Constant DaysInAYear: FixedValue=365
        Constant MaxDailyNUptake: FixedValue=10; Units=g/m2
        Constant DMConversionEfficiency: FixedValue=1; Units=g/m2
        Constant RemobilisationCost: FixedValue=0
        Constant MaximumRootDepth: FixedValue=3000; Units=mm
        Constant NitrogenDemandSwitch: FixedValue=1; Units=0-1
        KLModiferVsDepthFunction klModifier
          VariableReference LayerDepth: VariableName=[Physical].DepthMidPoints
          VariableReference MaximumRootDepth: VariableName=[Root].MaximumRootDepth
        MultiplyFunction SenescenceRate
          ExponentialFunction: A=0; B=1; C=1
            DivideFunction
              SubtractFunction
                SoilTemperatureDepthFunction: Depth=100
                Constant: FixedValue=20
              Constant: FixedValue=10
          Constant Coefficient: FixedValue=0.015
        Constant SpecificRootLength: FixedValue=105; Units=m/g
        LinearInterpolationFunction KNO3
          XYPairs: X=[0, 0.003]; Y=[0.02, 0.02]
          VariableReference XValue: VariableName=[Root].LengthDensity
        LinearInterpolationFunction KNH4
          XYPairs: X=[0, 0.003]; Y=[0, 0]
          VariableReference XValue: VariableName=[Root].LengthDensity
        BiomassRemoval BiomassRemovalDefaults: HarvestFractionLiveToRemove=0; HarvestFractionDeadToRemove=0; HarvestFractionLiveToResidue=0; HarvestFractionDeadToResidue=0
        LinearInterpolationFunction NUptakeSWFactor
          XYPairs: X=[0, 1]; Y=[0, 1]
          VariableReference XValue: VariableName=[Root].RWC
        Constant CarbonConcentration: FixedValue=0.4
        Constant MaintenanceRespirationFunction: FixedValue=0
        NutrientDemandFunctions DMDemands
          MultiplyFunction Structural
            PartitionFractionDemandFunction DMDemandFunction
              PhaseLookup PartitionFraction
                PhaseLookupValue AcitveGrowth: Start=BudBreak; End=BareTree
                  Constant: FixedValue=0.2
            Constant StructuralFraction: FixedValue=1
          Constant Metabolic: FixedValue=0
          Constant Storage: FixedValue=0
          Constant QStructuralPriority: FixedValue=1
          Constant QMetabolicPriority: FixedValue=1
          Constant QStoragePriority: FixedValue=1
        NutrientDemandFunctions NDemands
          MultiplyFunction Structural
            VariableReference MinNconc: VariableName=[Root].minimumNconc
            VariableReference PotentialDMAllocation: VariableName=[Root].potentialDMAllocation.Structural
          Constant Metabolic: FixedValue=0
          Constant Storage: FixedValue=0
          Constant QStructuralPriority: FixedValue=1
          Constant QMetabolicPriority: FixedValue=1
          Constant QStoragePriority: FixedValue=1
        NutrientPoolFunctions InitialWt
          Constant Structural: FixedValue=0; Units=g/plant
            Memo Param value set at establishment
              STRUM calculates this parameter value during run-time when the crop is established from parameter values set in the relevent STRUMtree object
          Constant Metabolic: FixedValue=0
          Constant Storage: FixedValue=0
        Constant RootDepthStressFactor: FixedValue=1
        Constant MaximumNConc: FixedValue=0
          Memo Param value set at establishment
            STRUM calculates this parameter value during run-time when the crop is established from parameter values set in the relevent STRUMtree object
        VariableReference CriticalNConc: VariableName=[Root].MaximumNConc
        VariableReference MinimumNConc: VariableName=[Root].MaximumNConc
      SimpleLeaf Leaf: Albedo=0.18; LeafInitialisationStage=Dormant
        zero: Gsmax350, R50, Height, BaseHeight, Width, FRGR, PotentialEP, WaterDemand, KDead, LAIDead
        Constant StomatalConductanceCO2Modifier: FixedValue=1
        Constant DetachmentRate: FixedValue=0; Units=/d
        Constant RemobilisationCost: FixedValue=0
        Constant InitialWt: FixedValue=0; Units=g/plant
        Constant LaiDead: FixedValue=0; Units=m^2/m^2
        RUEModel Photosynthesis
          Constant RUE: FixedValue=1.2
          WeightedTemperatureFunction FT: MaximumTemperatureWeighting=0.5
            XYPairs: X=[0, 10, 25, 40]; Y=[0, 1, 1, 0]
          LinearInterpolationFunction FW
            XYPairs: X=[0, 0.8, 1.5]; Y=[0, 1, 1]
            VariableReference XValue: VariableName=[Leaf].Fw
          RUECO2Function FCO2: PhotosyntheticPathway=C3
          VariableReference RadnInt: VariableName=[Leaf].RadiationIntercepted
          Constant FVPD: FixedValue=1
          Constant FN: FixedValue=1
        SubDailyInterpolation FRGR: agregationMethod=0
          XYPairs Response: X=[0, 10, 25, 40]; Y=[0, 1, 1, 0]
          ThreeHourAirTemperature InterpolationMethod
        MultiplyFunction ExtinctionCoefficient
          Constant UnstressedCoeff: FixedValue=0
            Memo Param value set at establishment
              SCRUM calculates this parameter value during run-time when the crop is established from parameter values set in the relevent SCRUMcrop and SCRUMmanagement objects
          LinearInterpolationFunction FW
            XYPairs: X=[0, 0.4, 0.9, 1.5]; Y=[0.2, 0.2, 1, 1]
            VariableReference XValue: VariableName=[Leaf].Fw
        Constant NReallocationFactor: FixedValue=0
        PhaseLookup SenescenceRate
          PhaseLookupValue LeafFall: Start=StartLeafFall; End=BareTree
            Constant: FixedValue=0
        BiomassRemoval BiomassRemovalDefaults: HarvestFractionLiveToRemove=0; HarvestFractionDeadToRemove=0; HarvestFractionLiveToResidue=0; HarvestFractionDeadToResidue=0
        Constant MaintenanceRespiration: FixedValue=0; Units=0-1
        Constant DMConversionEfficiency: FixedValue=1; Units=0-1
        Constant NRetranslocationFactor: FixedValue=0
        Constant NitrogenDemandSwitch: FixedValue=1
        Constant DMReallocationFactor: FixedValue=0
        Constant DMRetranslocationFactor: FixedValue=0
        Constant CarbonConcentration: FixedValue=0.4
        NutrientDemandFunctions DMDemands
          MultiplyFunction Structural
            PartitionFractionDemandFunction DMDemandFunction
              PhaseLookup PartitionFraction
                PhaseLookupValue CanopyExpansion: Start=BudBreak; End=StartFullCanopy
                  Constant: FixedValue=0.6
                PhaseLookupValue FruitGrowth: Start=StartFullCanopy; End=StartLeafFall
                  Constant: FixedValue=0.1
            Constant StructuralFraction: FixedValue=0.5; Units=0-1
          Constant Metabolic: FixedValue=0
          Constant Storage: FixedValue=0
          Constant QStructuralPriority: FixedValue=1
          Constant QMetabolicPriority: FixedValue=1
          Constant QStoragePriority: FixedValue=1
        NutrientDemandFunctions NDemands
          MultiplyFunction Structural
            VariableReference MinNconc: VariableName=[Leaf].minimumNconc
            VariableReference PotentialDMAllocation: VariableName=[Leaf].potentialDMAllocation.Structural
          Constant Metabolic: FixedValue=0
          Constant Storage: FixedValue=0
          Constant QStructuralPriority: FixedValue=1
          Constant QMetabolicPriority: FixedValue=1
          Constant QStoragePriority: FixedValue=1
        VariableReference BaseHeight: VariableName=[STRUM].Height.CanopyBaseHeight
        VariableReference HeightFunction: VariableName=[STRUM].Height
        VariableReference Wideness: VariableName=[STRUM].Width
        MultiplyFunction Area
          Constant Maximum: FixedValue=0; Units=m2/m2
          VariableReference RelativeAnnualDimension: VariableName=[STRUM].RelativeAnnualDimension
          VariableReference RelativeSeasonalDimension: VariableName=[STRUM].RelativeSeasonalDimension
          Constant FrostFactor: FixedValue=1
        Constant MaxNConcAtStartLeafFall: FixedValue=0
          Memo Param value set at establishment
            SCRUM calculates this parameter value during run-time when the crop is established from parameter values set in the relevent SCRUMcrop and SCRUMmanagement objects
        AddFunction MaximumNConc
          VariableReference MaxNConcAtStartLeafFall: VariableName=[Leaf].MaxNConcAtStartLeafFall
          MultiplyFunction EarlyNConcElevation
            SubtractFunction
              Constant YoungLeafNconc: FixedValue=0.04
              VariableReference MaxNConcAtStartLeafFall: VariableName=[Leaf].MaxNConcAtStartLeafFall
            LinearInterpolationFunction DilutionCurve
              XYPairs: X=[1, 3, 4, 5, 6, 7, 8]; Y=[1, 1, 0.1, 0.02, 0, 0, 0]
              VariableReference XValue: VariableName=[Phenology].Stage
        MultiplyFunction CriticalNConc
          Constant StructuralNFactor: FixedValue=0.6
          VariableReference MaxNConcAtStartLeafFall: VariableName=[Leaf].MaxNConcAtStartLeafFall
        MultiplyFunction MinimumNConc
          Constant StructuralNFactor: FixedValue=0.6
          VariableReference MaxNConcAtStartLeafFall: VariableName=[Leaf].MaxNConcAtStartLeafFall
      GenericOrgan Trunk: IsAboveGround=true
        Constant NReallocationFactor: FixedValue=0
        Constant NRetranslocationFactor: FixedValue=0
        Constant DMRetranslocationFactor: FixedValue=0.05
        PhaseLookupValue NitrogenDemandSwitch: Start=BudBreak; End=BareTree
          Constant: FixedValue=1
        BiomassRemoval BiomassRemovalDefaults: HarvestFractionLiveToRemove=0; HarvestFractionDeadToRemove=0; HarvestFractionLiveToResidue=0; HarvestFractionDeadToResidue=0
        Constant SenescenceRate: FixedValue=0; Units=/d
        Constant DetachmentRateFunction: FixedValue=0; Units=/d
        Constant MaintenanceRespirationFunction: FixedValue=0; Units=0-1
        Constant DMConversionEfficiency: FixedValue=1; Units=0-1
        Constant DMReallocationFactor: FixedValue=0
        Constant RemobilisationCost: FixedValue=0
        Constant CarbonConcentration: FixedValue=0.4
        NutrientDemandFunctions DMDemands
          PartitionFractionDemandFunction Structural
            PhaseLookup PartitionFraction
              PhaseLookupValue CanopyExpansion: Start=BudBreak; End=StartFullCanopy
                Constant: FixedValue=0.2
              PhaseLookupValue FruitGrowth: Start=StartFullCanopy; End=StartLeafFall
                Constant: FixedValue=0.15
              PhaseLookupValue LeafFall: Start=StartLeafFall; End=BareTree
                Constant: FixedValue=0
          Constant Metabolic: FixedValue=0
          Constant Storage: FixedValue=0
          Constant QStructuralPriority: FixedValue=1
          Constant QMetabolicPriority: FixedValue=1
          Constant QStoragePriority: FixedValue=1
        NutrientDemandFunctions NDemands
          Constant Storage: FixedValue=0
          Constant Metabolic: FixedValue=0
          MultiplyFunction Structural
            VariableReference MinNconc: VariableName=[Trunk].minimumNconc
            VariableReference PotentialDMAllocation: VariableName=[Trunk].potentialDMAllocation.Structural
          Constant QStructuralPriority: FixedValue=1
          Constant QMetabolicPriority: FixedValue=1
          Constant QStoragePriority: FixedValue=1
        RetranslocateNonStructural RetranslocateNitrogen
        EnergyBalance: Albedo=0.1; Gsmax350=0; R50=0; KDead=0; LAIDead=0
          Constant FRGRer: FixedValue=0
          Constant StomatalConductanceCO2Modifier: FixedValue=1
          VariableReference Tallness: VariableName=[STRUM].Height
          VariableReference Deepness: VariableName=[STRUM].Height
          Constant GreenAreaIndex: FixedValue=0
          MultiplyFunction DeadAreaIndex
            Constant VolumeToArea: FixedValue=0.3; Units=m2/l
            DivideFunction Volume
              VariableReference Wt: VariableName=[Trunk].Wt
              Constant Density: FixedValue=750; Units=g/l
          Constant GreenExtinctionCoefficient: FixedValue=0
          Constant DeadExtinctionCoefficient: FixedValue=0.5
          VariableReference Wideness: VariableName=[STRUM].Width
        NutrientPoolFunctions InitialWt
          Constant Structural: Units=g/m^2
            Memo Param value set at establishment
              STRUM calculates this parameter value during run-time when the crop is established from parameter values set in the relevent STRUMtree object
          Constant Metabolic: FixedValue=0
          Constant Storage: FixedValue=0
        Constant Photosynthesis: FixedValue=0
        VariableReference initialNConcFunction: VariableName=[Trunk].MinimumNConc
        Constant MaximumNConc: FixedValue=0.01
          Memo Param value set at establishment
            SCRUM calculates this parameter value during run-time when the crop is established from parameter values set in the relevent SCRUMcrop and SCRUMmanagement objects
        MultiplyFunction CriticalNConc
          Constant StructuralNFactor: FixedValue=0.6
          VariableReference MaxNConc: VariableName=[Trunk].MaxNConc
        MultiplyFunction MinimumNConc
          Constant StructuralNFactor: FixedValue=0.6
          VariableReference MaxNConc: VariableName=[Trunk].MaxNConc
      GenericOrgan Fruit: IsAboveGround=true
        Constant NReallocationFactor: FixedValue=0
        Constant NRetranslocationFactor: FixedValue=0
        Constant DMRetranslocationFactor: FixedValue=0
        PhaseLookupValue NitrogenDemandSwitch: Start=StartFullCanopy; End=StartLeafFall
          Constant: FixedValue=1
        BiomassRemoval BiomassRemovalDefaults: HarvestFractionLiveToRemove=0.8; HarvestFractionDeadToRemove=0; HarvestFractionLiveToResidue=0.2; HarvestFractionDeadToResidue=1
        Constant SenescenceRate: FixedValue=0; Units=/d
        Constant DetachmentRateFunction: FixedValue=0; Units=/d
        Constant MaintenanceRespirationFunction: FixedValue=0; Units=0-1
        Constant DMConversionEfficiency: FixedValue=1; Units=0-1
        Constant DMReallocationFactor: FixedValue=0
        Constant RemobilisationCost: FixedValue=0
        Constant CarbonConcentration: FixedValue=0.4
        NutrientDemandFunctions DMDemands
          MultiplyFunction Structural
            MaximumFunction RelativeFruitMass
              DeltaFunction Delta
                LinearInterpolationFunction Integral
                  XYPairs: X=[0, 80, 150, 250, 300, 365]; Y=[0, 0, 0.1, 0.9, 1, 1]
                  VariableReference XValue: VariableName=[Weather].DaysSinceWinterSolstice
              Constant Zero: FixedValue=0
            VariableReference Number: VariableName=[Fruit].Number
            VariableReference PotentialDW: VariableName=[Fruit].PotentialDryWt
          Constant Metabolic: FixedValue=0
          Constant Storage: FixedValue=0
          Constant QStructuralPriority: FixedValue=100
          Constant QMetabolicPriority: FixedValue=100
          Constant QStoragePriority: FixedValue=100
        NutrientDemandFunctions NDemands
          Constant Storage: FixedValue=0
          Constant Metabolic: FixedValue=0
          MultiplyFunction Structural
            VariableReference MinNconc: VariableName=[Trunk].minimumNconc
            VariableReference PotentialDMAllocation: VariableName=[Fruit].potentialDMAllocation.Structural
          Constant QStructuralPriority: FixedValue=1
          Constant QMetabolicPriority: FixedValue=1
          Constant QStoragePriority: FixedValue=1
        RetranslocateNonStructural RetranslocateNitrogen
        NutrientPoolFunctions InitialWt
          Constant Structural: FixedValue=0; Units=g/m^2
          Constant Metabolic: FixedValue=0
          Constant Storage: FixedValue=0
        Constant Photosynthesis: FixedValue=0
        VariableReference initialNConcFunction: VariableName=[Fruit].MaximumNConc
        Constant MaxNConcAtHarvest: FixedValue=0
          Memo Param value set at establishment
            SCRUM calculates this parameter value during run-time when the crop is established from parameter values set in the relevent SCRUMcrop and SCRUMmanagement objects
        AddFunction MaximumNConc
          VariableReference MaxNConcAtHarvest: VariableName=[Fruit].MaxNConcAtHarvest
          MultiplyFunction EarlyNConcElevation
            SubtractFunction
              Constant MaxNConcAtSet: FixedValue=4
              VariableReference MaxNConcAtHarvest: VariableName=[Fruit].MaxNConcAtHarvest
            LinearInterpolationFunction DilutionCurve: same as Replacements.STRUM.Leaf.MaximumNConc.EarlyNConcElevation.DilutionCurve
        MultiplyFunction CriticalNConc
          Constant StructuralNFactor: FixedValue=0.6
          VariableReference MaxNConcAtHarvest: VariableName=[Fruit].MaxNConcAtHarvest
        MultiplyFunction MinimumNConc
          Constant StructuralNFactor: FixedValue=0.6
          VariableReference MaxNConcAtHarvest: VariableName=[Fruit].MaxNConcAtHarvest
        Constant MaximumSize: FixedValue=0; Units=mm
        Constant Density: FixedValue=0; Units=g/cm3
        Constant MinimumDMC: FixedValue=0; Units=g/g
        MultiplyFunction PotentialDryWt
          ExpressionFunction Volume: Expression=((4/3*3.1415926*([Fruit].MaximumSize/2)^3/1000
          VariableReference Density: VariableName=[Fruit].Density
          VariableReference DMC: VariableName=[Fruit].MinimumDMC
          VariableReference RelativeAnnualDimension: VariableName=[STRUM].RelativeAnnualDimension
        MultiplyFunction DryMatterPc
          VariableReference UnStressedDM: VariableName=[Fruit].MinimumDMC
          LinearInterpolationFunction FruitAge
            XYPairs: X=[0, 3, 4, 5]; Y=[1, 1, 1, 1]
            VariableReference XValue: VariableName=[Weather].DaysSinceWinterSolstice
          LinearInterpolationFunction WaterStress
            XYPairs: X=[0, 85]; Y=[1, 1]
            VariableReference XValue: VariableName=[AccumulatedWaterStress]
        MultiplyFunction FreshWt
          DivideFunction FreshWtConversion
            Constant: FixedValue=1
            VariableReference DMconc: VariableName=[Fruit].DryMatterPc
          VariableReference DryWt: VariableName=[Fruit].Wt
        MultiplyFunction Number
          Constant RetainedPostThinning: FixedValue=15; Units=fruit/m2
          LinearInterpolationFunction WaterStress
            XYPairs: X=[0, 85]; Y=[1, 1]
            VariableReference XValue: VariableName=[AccumulatedWaterStress]
        DivideFunction FreshWtPerFruit
          VariableReference FreshWt: VariableName=[Fruit].FreshWt
          VariableReference Number: VariableName=[Fruit].Number
        DivideFunction VolumePerFruit
          VariableReference FreshWtPerFruit: VariableName=[Fruit].FreshWtPerFruit
          VariableReference Density: VariableName=[Fruit].Density
        MultiplyFunction FruitingBuds
          VariableReference RetainedPostThinning: VariableName=[Fruit].Number.RetainedPostThinning
          LinearInterpolationFunction WaterStress
            XYPairs: X=[0, 70, 90, 150, 200]; Y=[1, 1, 0.9, 0.6, 0]
            VariableReference XValue: VariableName=[AccumulatedWaterStress]
        ExpressionFunction Size: Expression=(6*[Fruit].VolumePerFruit/3.1415926)^(1/3)
      AccumulateFunction AccumulatedWaterStress: StartStageName=StartFullCanopy; EndStageName=StartLeafFall; ResetStageName=Dormant; FractionRemovedOnCut=0; FractionRemovedOnHarvest=0; FractionRemovedOnGraze=0; FractionRemovedOnPrune=1
        SubtractFunction StressIndex
          Constant One: FixedValue=1
          LinearInterpolationFunction FW
            XYPairs: X=[0.1, 0.9, 1.5]; Y=[0, 1, 1]
            VariableReference XValue: VariableName=[Leaf].Fw
      CompositeBiomass AboveGround: OrganNames=[Leaf, Trunk, Fruit]; IncludeLive=true; IncludeDead=true
      CompositeBiomass Total: OrganNames=[Leaf, Trunk, Fruit, Root]; IncludeLive=true; IncludeDead=true
      CompositeBiomass TotalLive: OrganNames=[Leaf, Trunk, Fruit, Root]; IncludeLive=true; IncludeDead=false
      CompositeBiomass TotalDead: OrganNames=[Leaf, Trunk, Fruit, Root]; IncludeLive=false; IncludeDead=true
      Constant MortalityRate: FixedValue=0
      Constant SeedMortalityRate: FixedValue=0
      Constant MaxPrunedHeight: FixedValue=0
      AddFunction Height
        MultiplyFunction CanopyBaseHeight
          Constant Maximum: FixedValue=0
          VariableReference RelativeAnnualDimension: VariableName=[STRUM].RelativeAnnualDimension
        MultiplyFunction PrunedCanopyDepth
          SubtractFunction Maximum
            VariableReference MaxPrunedHeight: VariableName=[STRUM].MaxPrunedHeight
            VariableReference MaxBaseHeight: VariableName=[STRUM].Height.CanopyBaseHeight.Maximum
          VariableReference RelativeAnnualDimension: VariableName=[STRUM].RelativeAnnualDimension
        MultiplyFunction SeasonalGrowth
          VariableReference RelativeSeasonalDimension: VariableName=[STRUM].RelativeSeasonalDimension
          Constant Maximum: FixedValue=100; Units=mm
          VariableReference RelativeAnnualDimension: VariableName=[STRUM].RelativeAnnualDimension
      AddFunction Width
        MultiplyFunction PrunedWidth
          VariableReference RelativeAnnualDimension: VariableName=[STRUM].RelativeAnnualDimension
          Constant Maximum: FixedValue=500; Units=mm
        MultiplyFunction SeasonalGrowth
          VariableReference RelativeSeasonalDimension: VariableName=[STRUM].RelativeSeasonalDimension
          Constant Maximum: FixedValue=500; Units=mm
      LinearInterpolationFunction RelativeAnnualDimension
        XYPairs: X=[0, 6]; Y=[0.4, 1]
        VariableReference XValue: VariableName=[Phenology].Age.YearDecimal
      StageBasedInterpolation RelativeSeasonalDimension: Values=[0, 0, 0, 0, 0.6, 1, 1, 1]; Proportional=true
    Report ReportRowOnly: EventNames=[Clock].DoReport
      VariableNames:
        [Clock].Today
        [Fertiliser].NitrogenApplied
        [Irrigation].IrrigationApplied
        [AgrgateZoneVariables].Script.PET
        [AgrgateZoneVariables].Script.ES
        [AgrgateZoneVariables].Script.ET
        [AgrgateZoneVariables].Script.FRadInt
        [AgrgateZoneVariables].Script.InterceptedRadiation
        [AgrgateZoneVariables].Script.TotRadn
        [AgrgateZoneVariables].Script.TWU
        [AgrgateZoneVariables].Script.PSW
        [ResetDate].Script.DAS
        [ResetDate].Script.DAS as DAS
        [ResetDate].Script.SimulationYear as SimYear
        [Row].STRUM.AccumulatedWaterStress
        [Row].STRUM.Arbitrator.DM.TotalPlantDemand
        [Row].STRUM.Arbitrator.DM.TotalPlantSupply
        [Row].STRUM.Arbitrator.Fn
        [Row].STRUM.Arbitrator.N.TotalPlantDemand
        [Row].STRUM.Arbitrator.N.TotalPlantSupply
        [Row].STRUM.Fruit.Allocated.StructuralWt
        [Row].STRUM.Fruit.DMDemand.Structural
        [Row].STRUM.Fruit.DryMatterPc
        [Row].STRUM.Fruit.FreshWtPerFruit
        [Row].STRUM.Fruit.FruitingBuds
        [Row].STRUM.Fruit.N
        [Row].STRUM.Fruit.NDemand.Structural
        [Row].STRUM.Fruit.Number
        [Row].STRUM.Fruit.Size
        [Row].STRUM.Fruit.VolumePerFruit
        [Row].STRUM.Fruit.Wt
        [Row].STRUM.Height.CanopyBaseHeight  + [Row].STRUM.Height.PrunedCanopyDepth + [Row].STRUM.Height.SeasonalGrowth
        [Row].STRUM.Height.CanopyBaseHeight  + [Row].STRUM.Height.PrunedCanopyDepth
        [Row].STRUM.Height.CanopyBaseHeight
        [Row].STRUM.Leaf.Area
        [Row].STRUM.Leaf.CoverGreen
        [Row].STRUM.Leaf.DMDemand.Structural
        [Row].STRUM.Leaf.Fn
        [Row].STRUM.Leaf.Fw
        [Row].STRUM.Leaf.Height
        [Row].STRUM.Leaf.LAI
        [Row].STRUM.Leaf.N
        [Row].STRUM.Leaf.NDemand.Structural
        [Row].STRUM.Leaf.PotentialEP
        [Row].STRUM.Leaf.RadiationIntercepted
        [Row].STRUM.Leaf.Transpiration
        [Row].STRUM.Leaf.WaterDemand
        [Row].STRUM.Leaf.Width
        [Row].STRUM.Leaf.Wt
        [Row].STRUM.Phenology.Age.YearDecimal
        [Row].STRUM.Phenology.Age.Years
        [Row].STRUM.Phenology.Stage
        [Row].STRUM.RelativeSeasonalDimension
        [Row].STRUM.Root.Depth
        [Row].STRUM.Root.DMDemand.Structural
        [Row].STRUM.Root.N
        [Row].STRUM.Root.NDemand.Structural
        [Row].STRUM.Root.Wt
        [Row].STRUM.Root.WaterUptakeByZone
        [Row].STRUM.Trunk.DMDemand.Structural
        [Row].STRUM.Trunk.EnergyBalance.CoverTotal
        [Row].STRUM.Trunk.EnergyBalance.DeadAreaIndex
        [Row].STRUM.Trunk.EnergyBalance.LAIDead
        [Row].STRUM.Trunk.EnergyBalance.RadiationInterceptedByDead
        [Row].STRUM.Trunk.N
        [Row].STRUM.Trunk.NDemand.Structural
        [Row].STRUM.Trunk.Wt
        [Row].STRUM.Width
        [Row].STRUM.Width.PrunedWidth + [Row].STRUM.Width.SeasonalGrowth
        [Row].STRUM.Width.PrunedWidth
        [Soil].OutputLayers.SW
        [Soil].SoilWater.Drainage
        [Soil].SoilWater.Eos
        [Soil].SoilWater.Eo
        sum([Soil].Physical.DULmm) as ProfileDUL
        sum([Soil].Physical.LL15mm) as ProfileLL15
        [Weather].DaysSinceWinterSolstice
        [Weather].Radn
        [Weather].Rain
        [Weather].PanEvap
        sum([Soil].SoilWater.SWmm) as WholeProfileSWmm
        sum([Soil].Nutrient.MineralN)
    Report ReportAlleyOnly: EventNames=[Clock].DoReport
      VariableNames:
        [Clock].Today
        [Fertiliser].NitrogenApplied
        [Irrigation].IrrigationApplied
        [AgrgateZoneVariables].Script.PET
        [AgrgateZoneVariables].Script.ES
        [AgrgateZoneVariables].Script.ET
        [AgrgateZoneVariables].Script.FRadInt
        [AgrgateZoneVariables].Script.InterceptedRadiation
        [AgrgateZoneVariables].Script.TotRadn
        [AgrgateZoneVariables].Script.TWU
        [AgrgateZoneVariables].Script.PSW
        [Alley].Slurp.CoverGreen
        [Alley].Slurp.Leaf.Area
        [Alley].Slurp.Leaf.Height
        [Alley].Slurp.Root.Depth
        [Alley].Slurp.Leaf.Transpiration
        [Alley].Slurp.Leaf.RadiationIntercepted
        [Alley].Slurp.Root.WaterUptakeByZone
        [ResetDate].Script.DAS as DAS
        [ResetDate].Script.SimulationYear as SimYear
        [Soil].OutputLayers.SW
        [Soil].SoilWater.Drainage
        [Weather].DaysSinceWinterSolstice
        [Weather].Radn
        [Weather].Rain
        sum([Soil].OutputLayers.SWmm)
        sum([Soil].SoilWater.SWmm) as WholeProfileSWmm
        sum([Soil].Nutrient.MineralN)
        [Weather].PanEvap
    Report ReportRowAlley: EventNames=[Clock].DoReport
      VariableNames:
        [Clock].Today
        [Irrigation].IrrigationApplied
        [ResetDate].Script.DAS as DAS
        [ResetDate].Script.SimulationYear as SimYear
        ([Row].Irrigation.IrrigationApplied*[Row].Width + [Alley].Irrigation.IrrigationApplied*[Alley].Width)/([Row].Width + [Alley].Width) as WeightedAverage_IrrigationApplied
        [Row].STRUM.Fruit.FreshWtPerFruit
        [Row].STRUM.AccumulatedWaterStress
        [Weather].Rain
        [Weather].PanEvap
    Manager AgrgateZoneVariables
```csharp
using Models.Climate;
using System;
using Models.Core;
using Models.PMF;
using System.Collections.Generic;
using Models.Soils;
using APSIM.Shared.Utilities;
using Models.Zones;
using Models.PMF.Organs;

namespace Models
{
    [Serializable]
    public class Script : Model
    {
        [Link] private Weather weather;
        [Link(Type = LinkType.Scoped, ByName = true)] private OutputLayers outputLayers;
        private RectangularZone AlleyZone {get; set; }
        private RectangularZone RowZone {get; set;}
        private RectangularZone ThisZone {get; set;}
        private double AreaWidth {get; set;}
        private double TreeWidth {get; set;}
        public double TotRadn {get; set;}
        public double RadInt {get; set;}
        public double FRadInt {get; set;}
        public double ET {get; set;}
        public double ES {get; set;}
        public double PET {get; set;}
        public double InterceptedRadiation {get; set;}
        public double TreeRadInt {get; set;}
        public double TWU {get;set;}
        public double PSW {get;set;}

        [EventSubscribe("StartOfSimulation")]
        private void DoStartOfSimulation(object sender, EventArgs e)
        {
               
               ThisZone = this.Parent.Parent as RectangularZone;
               RowZone = this.Parent.Parent.Parent.FindInScope("Row") as RectangularZone;
               AlleyZone = (RectangularZone)this.Parent.Parent.Parent.FindInScope("Alley") as RectangularZone;
               double AlleyWidth = 0;
               if (AlleyZone != null)
                       AlleyWidth = AlleyZone.Width; 
               AreaWidth = AlleyWidth + RowZone.Width;
               TreeWidth = 0;
        }
        
        [EventSubscribe("DoReportCalculations")]
        private void OnDoReportCalculations(object sender, EventArgs e)
        {

            if (ThisZone.Name == "Row")
                {
                TreeRadInt = (double)RowZone.Get("STRUM.Leaf.RadiationIntercepted") + (double)RowZone.Get("STRUM.Trunk.EnergyBalance.RadiationInterceptedByDead");
                FRadInt = (TreeRadInt * RowZone.Width)/(weather.Radn * AreaWidth);
                InterceptedRadiation = (double)RowZone.Get("STRUM.Leaf.RadiationIntercepted");
                ET = (double)RowZone.Get("STRUM.Leaf.Transpiration") * RowZone.Width/AreaWidth;
                TreeWidth = (double)RowZone.Get("STRUM.Leaf.Width")/1000;
                TWU = (double)RowZone.Get("STRUM.Leaf.Transpiration")/(double)RowZone.Get("STRUM.Leaf.LAI") * 2.5; 
                }
            else if (ThisZone.Name == "Alley")
                {
                FRadInt = ((double)AlleyZone.Get("Slurp.Leaf.RadiationIntercepted") * AlleyZone.Width)/(weather.Radn * AreaWidth);
                InterceptedRadiation = (double)AlleyZone.Get("Slurp.Leaf.RadiationIntercepted");
                ET = (double)AlleyZone.Get("Slurp.Leaf.Transpiration") * ThisZone.Width/AreaWidth;
                }
            TotRadn = weather.Radn * AreaWidth; 
            ES = (double)ThisZone.Get("Soil.SoilWater.Es") * ThisZone.Width/AreaWidth;
            double PETWidth = Math.Min(Math.Max(TreeWidth,ThisZone.Width),AreaWidth);
            PET = (double)ThisZone.Get("Soil.SoilWater.Eo") * PETWidth/AreaWidth;
            PSW = 0;
            for (int layer = 0; layer < outputLayers.Thickness.Length; layer++)
            {
                PSW += outputLayers.SWmm[layer];
            }
        }
    }
}
```
    StrumTreeInstance WashStateApple: AgeAtSimulationStart=5; YearsToMaxDimension=6; TrunkMassAtMaxDimension=12; BudBreakDAWS=100; StartFullCanopyDAWS=150; StartLeafFallDAWS=305; EndLeafFallDAWS=330; GRINZ=false; MaxRD=3000; CanopyBaseHeight=1000; MaxPrunedHeight=2800; MaxPrunedWidth=1300; RootNConc=0.01; LeafNConc=0.02; TrunkNConc=0.01; FruitNConc=0.02; ExtinctCoeff=0.8; GSMax=0.004; R50=100; WaterStress=false; Number=40; DMC=0.16
      zero: RowSpacing, InterRowSpacing, AlleyZoneWidthFrac, WoodDensity, Proot, Pleaf, Ptrunk, MaxHeight, MaxWidth, BaseCover, MaxCover, RUE, PotentialFWPerFruit, FruitDensity, DAFStartLinearGrowth, DAFEndLinearGrowth, DAFMaxSize, TotalSolarRadiation
  DataStore
    ExcelInput: FileNames=[AllObs.xlsx]; SheetNames=[Observed]
    PredictedObserved: PredictedTableName=ReportRowOnly; ObservedTableName=Observed; FieldNameUsedForMatch=SimulationName; FieldName2UsedForMatch=Zone; FieldName3UsedForMatch=Clock.Today; AllColumns=false
    PredictedObserved DrainagePO (disabled): PredictedTableName=Drainage; ObservedTableName=Observed; FieldNameUsedForMatch=SimulationName; FieldName2UsedForMatch=Zone; FieldName3UsedForMatch=Clock.Today; AllColumns=false
  Folder Apple_Scenarios
    Experiment Apple_MultiSites_Planar
      Memo ScenarioDescription
        *	Progressive water stress treatments.

        *	Progressive stress achieved by withholding irrigation approximately biweekly increments during the irrigation window.
      Factors
        Permutation
          Factor Irr
            CompositeFactor Nil: Specifications=[AutoIrrigationDeficitBased].Script.AllowIrrigation = false
            CompositeFactor FullYear
              Specifications:
                [AutoIrrigationDeficitBased].Script.SeasonStart = 1-Jan
                [AutoIrrigationDeficitBased].Script.SeasonEnd = 31-Dec
            CompositeFactor FullSeasonIrr
              Specifications:
                [AutoIrrigationDeficitBased].Script.SeasonStart = 1-Oct
                [AutoIrrigationDeficitBased].Script.SeasonEnd = 30-Apr
            CompositeFactor Oct_Mar
              Specifications:
                [AutoIrrigationDeficitBased].Script.SeasonStart = 1-Oct
                [AutoIrrigationDeficitBased].Script.SeasonEnd = 31-Mar
            CompositeFactor Oct_Feb
              Specifications:
                [AutoIrrigationDeficitBased].Script.SeasonStart = 1-Oct
                [AutoIrrigationDeficitBased].Script.SeasonEnd = 28-Feb
            CompositeFactor Oct_Jan
              Specifications:
                [AutoIrrigationDeficitBased].Script.SeasonStart = 1-Oct
                [AutoIrrigationDeficitBased].Script.SeasonEnd = 31-Jan
            CompositeFactor Oct_Dec
              Specifications:
                [AutoIrrigationDeficitBased].Script.SeasonStart = 1-Oct
                [AutoIrrigationDeficitBased].Script.SeasonEnd = 31-Dec
            CompositeFactor Oct_Nov
              Specifications:
                [AutoIrrigationDeficitBased].Script.SeasonStart = 1-Oct
                [AutoIrrigationDeficitBased].Script.SeasonEnd = 30-Nov
          Factor Season
            CompositeFactor 1985
              Specifications:
                [Clock].StartDate = 1985-06-01
                [Clock].EndDate = 1986-05-31
            CompositeFactor 1986
              Specifications:
                [Clock].StartDate = 1986-06-01
                [Clock].EndDate = 1987-05-31
            CompositeFactor 1987
              Specifications:
                [Clock].StartDate = 1987-06-01
                [Clock].EndDate = 1988-05-31
            CompositeFactor 1988
              Specifications:
                [Clock].StartDate = 1988-06-01
                [Clock].EndDate = 1989-05-31
            CompositeFactor 1989
              Specifications:
                [Clock].StartDate = 1989-06-01
                [Clock].EndDate = 1990-05-31
            CompositeFactor 1990
              Specifications:
                [Clock].StartDate = 1990-06-01
                [Clock].EndDate = 1991-05-31
            CompositeFactor 1991
              Specifications:
                [Clock].StartDate = 1991-06-01
                [Clock].EndDate = 1992-05-31
            CompositeFactor 1992
              Specifications:
                [Clock].StartDate = 1992-06-01
                [Clock].EndDate = 1993-05-31
            CompositeFactor 1993
              Specifications:
                [Clock].StartDate = 1993-06-01
                [Clock].EndDate = 1994-05-31
            CompositeFactor 1994
              Specifications:
                [Clock].StartDate = 1994-06-01
                [Clock].EndDate = 1995-05-31
            CompositeFactor 1995
              Specifications:
                [Clock].StartDate = 1995-06-01
                [Clock].EndDate = 1996-05-31
            CompositeFactor 1996
              Specifications:
                [Clock].StartDate = 1996-06-01
                [Clock].EndDate = 1997-05-31
            CompositeFactor 1997
              Specifications:
                [Clock].StartDate = 1997-06-01
                [Clock].EndDate = 1998-05-31
            CompositeFactor 1998
              Specifications:
                [Clock].StartDate = 1998-06-01
                [Clock].EndDate = 1999-05-31
            CompositeFactor 1999
              Specifications:
                [Clock].StartDate = 1999-06-01
                [Clock].EndDate = 2000-05-31
            CompositeFactor 2000
              Specifications:
                [Clock].StartDate = 2000-06-01
                [Clock].EndDate = 2001-05-31
            CompositeFactor 2001
              Specifications:
                [Clock].StartDate = 2001-06-01
                [Clock].EndDate = 2002-05-31
            CompositeFactor 2002
              Specifications:
                [Clock].StartDate = 2002-06-01
                [Clock].EndDate = 2003-05-31
            CompositeFactor 2003
              Specifications:
                [Clock].StartDate = 2003-06-01
                [Clock].EndDate = 2004-05-31
            CompositeFactor 2004
              Specifications:
                [Clock].StartDate = 2004-06-01
                [Clock].EndDate = 2005-05-31
            CompositeFactor 2005
              Specifications:
                [Clock].StartDate = 2005-06-01
                [Clock].EndDate = 2006-05-31
            CompositeFactor 2006
              Specifications:
                [Clock].StartDate = 2006-06-01
                [Clock].EndDate = 2007-05-31
            CompositeFactor 2007
              Specifications:
                [Clock].StartDate = 2007-06-01
                [Clock].EndDate = 2008-05-31
            CompositeFactor 2008
              Specifications:
                [Clock].StartDate = 2008-06-01
                [Clock].EndDate = 2009-05-31
            CompositeFactor 2009
              Specifications:
                [Clock].StartDate = 2009-06-01
                [Clock].EndDate = 2010-05-31
            CompositeFactor 2010
              Specifications:
                [Clock].StartDate = 2010-06-01
                [Clock].EndDate = 2011-05-31
            CompositeFactor 2011
              Specifications:
                [Clock].StartDate = 2011-06-01
                [Clock].EndDate = 2012-05-31
            CompositeFactor 2012
              Specifications:
                [Clock].StartDate = 2012-06-01
                [Clock].EndDate = 2013-05-31
            CompositeFactor 2013
              Specifications:
                [Clock].StartDate = 2013-06-01
                [Clock].EndDate = 2014-05-31
            CompositeFactor 2014
              Specifications:
                [Clock].StartDate = 2014-06-01
                [Clock].EndDate = 2015-05-31
          Factor VCSN_Weather
            CompositeFactor Brightwater: Specifications=[Weather]
              Weather: FileName=VCS_Brightwater.met
            CompositeFactor Jervoistown: Specifications=[Weather]
              Weather: FileName=VCS_Jervoistown.met
            CompositeFactor PalmerstonNorth: Specifications=[Weather]
              Weather: FileName=VCS_Turitea.met
            CompositeFactor Ranfurly: Specifications=[Weather]
              Weather: FileName=VCS_Ranfurly.met
            CompositeFactor Martinborough: Specifications=[Weather]
              Weather: FileName=VCS_Martinborough.met
            CompositeFactor Cromwell: Specifications=[Weather]
              Weather: FileName=VCS_Cromwell.met
          Factor SoilType
            CompositeFactor Waikiwi_33a2: Specifications=[Soil]
              Soil Waikiwi_33a2: SoilType=Typic Firm Brown Soils; LocalName=Waikiwi_33a2; Latitude=-41; Longitude=174
                DataSource=Profile descriptions provided by Smap based on the work done by Trevor Webb.
                Chemical: Thickness=[200, 100, 250, 1450, 1000]; PH=[7, 7, 7, 7, 7]; PHUnits=Water
                Physical
                  Thickness  ParticleSizeClay  ParticleSizeSand  ParticleSizeSilt  BD     AirDry  LL15   DUL    SAT    KS
                  200        30                12.5              57.5              1.19   0.107   0.214  0.418  0.512  1440
                  100        30                12.5              57.5              1.253  0.112   0.224  0.395  0.49   1440
                  250        30                12.5              57.5              1.357  0.226   0.226  0.37   0.454  960
                  362.5      30                12.5              57.5              1.442  0.254   0.254  0.393  0.424  192
                  362.5      30                12.5              57.5              1.442  0.254   0.254  0.393  0.424  192
                  362.5      30                12.5              57.5              1.442  0.254   0.254  0.393  0.424  192
                  362.5      30                12.5              57.5              1.442  0.254   0.254  0.393  0.424  192
                  1000       30                12.5              57.5              1.442  0.254   0.254  0.393  0.424  192
                  SoilCrop SlurpSoil: LL=[0.214, 0.224, 0.226, 0.254, 0.254, 0.254, 0.254, 0.254]; KL=[0.087, 0.056, 0.034, 0.012, 0.004, 0, 0, 0]; XF=[1, 1, 1, 0.766, 0.766, 0.766, 0.766, 0.766]
                  SoilCrop STRUMSoil: LL=[0.214, 0.224, 0.226, 0.254, 0.254, 0.254, 0.254, 0.254]; KL=[0.078, 0.078, 0.078, 0.078, 0.078, 0.078, 0.078, 0.078]; XF=[1, 1, 1, 1, 1, 1, 1, 1]
                WaterBalance SoilWater: SummerDate=1-oct; SummerU=9; SummerCona=4.4; WinterDate=1-apr; WinterU=4; WinterCona=2; DiffusConst=88; DiffusSlope=35; Salb=0.13; CN2Bare=88; CNRed=20; CNCov=0.8; DischargeWidth=0; CatchmentArea=0; PSIDul=-100
                  Thickness  SWCON  KLAT
                  200        0.5    0
                  100        0.5    0
                  250        0.3    0
                  1450       0.2    0
                  1000       0.2    0
                Organic: FOMCNRatio=40; CarbonUnits=Total
                  Thickness  Carbon  SoilCNRatio  FBiom  FInert  FOM
                  50         5       11.1         0.079  0.396   124.07
                  50         5       11.1         0.061  0.457   115.105
                  50         5       11.1         0.048  0.507   106.788
                  50         4.13    11.1         0.038  0.562   99.072
                  50         2.834   11.1         0.031  0.622   91.914
                  50         1.966   11.1         0.025  0.675   85.272
                  50         1.384   11.1         0.021  0.722   79.111
                  50         0.993   11.1         0.018  0.765   73.394
                  50         0.732   11.1         0.016  0.803   68.091
                  50         0.557   11.1         0.015  0.838   63.171
                  250        0.307   11.1         0.012  0.916   43.417
                  250        0.215   11.1         0.01   0.977   29.84
                  500        0.201   11.1         0.01   0.991   14.095
                  500        0.2     11.1         0.01   0.996   6.658
                  1000       0.2     11.1         0.01   0.996   6.658
                CERESSoilTemperature Temperature
                Water: Thickness=[200, 100, 250, 362.5, 362.5, 362.5, 362.5, 1000]; InitialValues=[0.398, 0.378, 0.356, 0.379, 0.379, 0.379, 0.379, 0.379]; InitialPAWmm=390.95; RelativeTo=LL15; FilledFromTop=false
                LayerStructure: Thickness=[200, 100, 250, 362.5, 362.5, 362.5, 362.5, 1000]
                Solute NO3: Thickness=[200, 100, 250, 1450, 1000]; InitialValues=[5.323, 5.053, 0.043, 0.041, 0.041]; InitialValuesUnits=ppm; WaterTableConcentration=0; D0=0; DepthConstant=0; MaxDepthSoluteAccessible=0; RunoffEffectivenessAtMovingSolute=0; MaxEffectiveRunoff=0
                Solute NH4: Thickness=[200, 100, 250, 1450, 1000]; InitialValues=[0.798, 0.758, 0.007, 0.006, 0.006]; InitialValuesUnits=ppm; WaterTableConcentration=0; D0=0; DepthConstant=0; MaxDepthSoluteAccessible=0; RunoffEffectivenessAtMovingSolute=0; MaxEffectiveRunoff=0
                Solute Urea: Thickness=[200, 100, 250, 1450, 1000]; InitialValues=[0, 0, 0, 0, 0]; InitialValuesUnits=kg/ha; WaterTableConcentration=0; D0=0; DepthConstant=0; MaxDepthSoluteAccessible=0; RunoffEffectivenessAtMovingSolute=0; MaxEffectiveRunoff=0
                OutputLayers: Thickness=[300, 300, 300, 300, 300, 300, 1200]
                Nutrient
            CompositeFactor Windermere_16a1: Specifications=[Soil]
              Soil Windermere_16a1: SoilType=Mellow Humic Organic Soils; LocalName=Windermere_16a1; Latitude=-41; Longitude=174
                DataSource=Profile descriptions provided by Smap based on the work done by Trevor Webb.
                Chemical: Thickness=[200, 110, 1690, 1000]; PH=[7, 7, 7, 7]; PHUnits=Water
                Physical
                  Thickness  ParticleSizeClay  ParticleSizeSand  ParticleSizeSilt  BD     AirDry  LL15   DUL    SAT    KS
                  200        10                10                80                0.3    0.093   0.186  0.636  0.804  960
                  110        30                3                 67                0.3    0.101   0.186  0.636  0.804  720
                  338        27                45                28                1.476  0.208   0.208  0.357  0.412  192
                  338        27                45                28                1.476  0.208   0.208  0.357  0.412  192
                  338        27                45                28                1.476  0.208   0.208  0.357  0.412  192
                  338        27                45                28                1.476  0.208   0.208  0.357  0.412  192
                  338        27                45                28                1.476  0.208   0.208  0.357  0.412  192
                  1000       27                45                28                1.476  0.208   0.208  0.357  0.412  192
                  SoilCrop SlurpSoil: LL=[0.186, 0.186, 0.208, 0.208, 0.208, 0.208, 0.208, 0.208]; KL=[0.115, 0.074, 0.024, 0.009, 0.004, 0, 0, 0]; XF=[1, 1, 0.766, 0.766, 0.766, 0.766, 0.766, 0.766]
                  SoilCrop STRUMSoil: LL=[0.186, 0.186, 0.208, 0.208, 0.208, 0.208, 0.208, 0.208]; KL=[0.078, 0.078, 0.078, 0.078, 0.078, 0.078, 0.078, 0.078]; XF=[1, 1, 1, 1, 1, 1, 1, 1]
                WaterBalance SoilWater: SummerDate=1-oct; SummerU=9; SummerCona=4.4; WinterDate=1-apr; WinterU=4; WinterCona=2; DiffusConst=88; DiffusSlope=35; Salb=0.13; CN2Bare=90; CNRed=16; CNCov=0.8; DischargeWidth=0; CatchmentArea=0; PSIDul=-100
                  Thickness  SWCON  KLAT
                  200        0.3    0
                  110        0.2    0
                  1690       0.2    0
                  1000       0.2    0
                Organic: FOMCNRatio=40; CarbonUnits=Total
                  Thickness  Carbon  SoilCNRatio  FBiom  FInert  FOM
                  50         30      12.3         0.079  0.858   124.07
                  50         30      12.3         0.061  0.858   115.105
                  50         30      12.3         0.048  0.858   106.788
                  50         24.598  12.3         0.038  0.865   99.072
                  50         16.555  12.3         0.031  0.879   91.914
                  50         11.163  12.3         0.025  0.891   85.272
                  50         7.549   12.3         0.021  0.902   79.111
                  50         5.126   12.3         0.018  0.912   73.394
                  50         3.502   12.3         0.016  0.922   68.091
                  50         2.413   12.3         0.015  0.931   63.171
                  250        0.867   12.3         0.012  0.955   43.417
                  250        0.29    12.3         0.01   0.983   29.84
                  500        0.204   12.3         0.01   0.991   14.095
                  500        0.2     12.3         0.01   0.996   6.658
                  1000       0.2     12.3         0.01   0.996   6.658
                CERESSoilTemperature Temperature
                Water: Thickness=[200, 110, 338, 338, 338, 338, 338, 1000]; InitialValues=[0.591, 0.591, 0.342, 0.342, 0.342, 0.342, 0.342, 0.342]; InitialPAWmm=486.01; RelativeTo=LL15; FilledFromTop=false
                LayerStructure: Thickness=[200, 110, 338, 338, 338, 338, 338, 1000]
                Solute NO3: Thickness=[200, 110, 1690, 1000]; InitialValues=[21.111, 19.21, 0.04, 0.04]; InitialValuesUnits=ppm; WaterTableConcentration=0; D0=0; DepthConstant=0; MaxDepthSoluteAccessible=0; RunoffEffectivenessAtMovingSolute=0; MaxEffectiveRunoff=0
                Solute NH4: Thickness=[200, 110, 1690, 1000]; InitialValues=[3.167, 2.881, 0.006, 0.006]; InitialValuesUnits=ppm; WaterTableConcentration=0; D0=0; DepthConstant=0; MaxDepthSoluteAccessible=0; RunoffEffectivenessAtMovingSolute=0; MaxEffectiveRunoff=0
                Solute Urea: Thickness=[200, 110, 1690, 1000]; InitialValues=[0, 0, 0, 0]; InitialValuesUnits=kg/ha; WaterTableConcentration=0; D0=0; DepthConstant=0; MaxDepthSoluteAccessible=0; RunoffEffectivenessAtMovingSolute=0; MaxEffectiveRunoff=0
                OutputLayers: Thickness=[300, 300, 300, 300, 300, 300, 1200]
                Nutrient
            CompositeFactor Patua_10a1: Specifications=[Soil]
              Soil Patua_10a1: SoilType=Typic Impeded Allophanic Soils; LocalName=Patua_10a1; Latitude=-41; Longitude=174
                DataSource=Profile descriptions provided by Smap based on the work done by Trevor Webb.
                Chemical: Thickness=[125, 250, 125, 1500, 1000]; PH=[7, 7, 7, 7, 7]; PHUnits=Water
                Physical
                  Thickness  ParticleSizeClay  ParticleSizeSand  ParticleSizeSilt  Rocks  BD     AirDry  LL15   DUL    SAT    KS
                  125        17.5              35                47.5              0      0.801  0.116   0.232  0.497  0.607  1920
                  250        22.5              35                42.5              0      0.765  0.191   0.294  0.447  0.621  1920
                  125        5                 85                10                0.382  0.575  0.145   0.145  0.274  0.45   1920
                  300        5                 85                10                0.668  0.369  0.092   0.092  0.172  0.266  960
                  300        5                 85                10                0.668  0.369  0.092   0.092  0.172  0.266  960
                  300        5                 85                10                0.668  0.369  0.092   0.092  0.172  0.266  960
                  300        5                 85                10                0.668  0.369  0.092   0.092  0.172  0.266  960
                  300        5                 85                10                0.668  0.369  0.092   0.092  0.172  0.266  960
                  1000       5                 85                10                0.668  0.369  0.092   0.092  0.172  0.266  960
                  Rocks source: Calculated
                  SoilCrop SlurpSoil
                    LL=[0.232, 0.294, 0.145, 0.092, 0.092, 0.092, 0.092, 0.092, 0.092]
                    KL=[0.096, 0.066, 0.038, 0.015, 0, 0, 0, 0, 0]
                    XF=[1, 1, 1, 0.141, 0, 0, 0, 0, 0]
                  SoilCrop STRUMSoil
                    LL=[0.232, 0.294, 0.145, 0.092, 0.092, 0.092, 0.092, 0.092, 0.092]
                    KL=[0.078, 0.078, 0.078, 0.078, 0.078, 0.078, 0.078, 0.078, 0.078]
                    XF=[1, 1, 1, 1, 1, 1, 1, 1, 1]
                WaterBalance SoilWater: SummerDate=1-oct; SummerU=9; SummerCona=4.4; WinterDate=1-apr; WinterU=4; WinterCona=2; DiffusConst=88; DiffusSlope=35; Salb=0.13; CN2Bare=92; CNRed=18; CNCov=0.8; DischargeWidth=0; CatchmentArea=0; PSIDul=-100
                  Thickness  SWCON  KLAT
                  125        0.4    0
                  250        0.3    0
                  125        0.5    0
                  1500       0.45   0
                  1000       0.45   0
                Organic: FOMCNRatio=40; CarbonUnits=Total
                  Thickness  Carbon  SoilCNRatio  FBiom  FInert  FOM
                  50         10      11.1         0.079  0.575   124.07
                  50         10      11.1         0.061  0.575   115.105
                  50         10      11.1         0.048  0.614   106.788
                  50         8.224   11.1         0.038  0.662   99.072
                  50         5.578   11.1         0.031  0.709   91.914
                  50         3.805   11.1         0.025  0.75    85.272
                  50         2.617   11.1         0.021  0.785   79.111
                  50         1.82    11.1         0.018  0.816   73.394
                  50         1.286   11.1         0.016  0.844   68.091
                  50         0.928   11.1         0.015  0.868   63.171
                  250        0.419   11.1         0.012  0.924   43.417
                  250        0.23    11.1         0.01   0.978   29.84
                  500        0.201   11.1         0.01   0.991   14.095
                  500        0.2     11.1         0.01   0.996   6.658
                  1000       0.2     11.1         0.01   0.996   6.658
                CERESSoilTemperature Temperature
                Water: Thickness=[125, 250, 125, 300, 300, 300, 300, 300, 1000]; InitialPAWmm=258.875; RelativeTo=LL15; FilledFromTop=false
                  InitialValues=[0.471, 0.432, 0.261, 0.164, 0.164, 0.164, 0.164, 0.164, 0.164]
                LayerStructure: Thickness=[125, 250, 125, 300, 300, 300, 300, 300, 1000]
                Solute NO3: Thickness=[125, 250, 125, 1500, 1000]; InitialValues=[7.907, 5.818, 0.102, 0.159, 0.159]; InitialValuesUnits=ppm; WaterTableConcentration=0; D0=0; DepthConstant=0; MaxDepthSoluteAccessible=0; RunoffEffectivenessAtMovingSolute=0; MaxEffectiveRunoff=0
                Solute NH4: Thickness=[125, 250, 125, 1500, 1000]; InitialValues=[1.186, 0.873, 0.015, 0.024, 0.024]; InitialValuesUnits=ppm; WaterTableConcentration=0; D0=0; DepthConstant=0; MaxDepthSoluteAccessible=0; RunoffEffectivenessAtMovingSolute=0; MaxEffectiveRunoff=0
                Solute Urea: Thickness=[125, 250, 125, 1500, 1000]; InitialValues=[0, 0, 0, 0, 0]; InitialValuesUnits=kg/ha; WaterTableConcentration=0; D0=0; DepthConstant=0; MaxDepthSoluteAccessible=0; RunoffEffectivenessAtMovingSolute=0; MaxEffectiveRunoff=0
                OutputLayers: Thickness=[300, 300, 300, 300, 300, 300, 1200]
                Nutrient
            Memo Notes
              ### Notes about this factor

              _Rogerio Cichota_

              Eyre_23a3 is a Weathered Orthic Recent soil
              Darnley_4a2 is a Typic Argillic Pallic Soil
              Waikiwi_33a2 is a Typic Firm Brown Soil
              Windermere_16a1 is a Mellow Humic Organic Soil
              Patua_10a1 is a Typic Impeded Allophanic Soil

              ==========================================================================================

              **Summmaries, selected properties**

              | SoilName | RootingDepth | BD_TopLayer | BDMax_AnyLayer | PAW_Top100cm | PAW_Total | KSat_TopLayer | KSatMin_AnyLayer | Carbon_TopLayer | CN2Bare | CNReduction |
              |:-------- | ------------:| -----------:| --------------:| ------------:| ---------:| -------------:| ----------------:| ---------------:| -------:| -----------:|
              |          |         (mm) |     (kg/m³) |        (kg/m³) |         (mm) |      (mm) |        (mm/h) |           (mm/h) |             (%) |     (-) |         (-) |
              | Eyre_23a3 | 710 | 0.841 | 0.841 | 53.5 | 79.5 | 1440 | 1440 | 2.97 | 99.0 | 39.0 |
              | Darnley_4a2 | 700 | 1.254 | 1.388 | 102.0 | 160.0 | 1440 | 1.2 | 3.90 | 89.0 | 20.0 |
              | Waikiwi_33a2 | 2000 | 1.189 | 1.441 | 156.5 | 295.5 | 1440 | 192 | 4.78 | 88.0 | 20.0 |
              | Windermere_16a1 | 2000 | 0.300 | 1.476 | 242.3 | 391.3 | 960 | 192 | 28.65 | 90.0 | 16.0 |
              | Patua_10a1 | 800 | 0.801 | 0.801 | 127.5 | 207.5 | 1920 | 960 | 10.00 | 92.0 | 18.0 |
              | Templeton_1a2 | 2000 | 1.332 | 1.693 | 171.3 | 328.3 | 1440 | 24 | 3.72 | 88.0 | 20.0 |
              | Flaxton_4a1 | 2000 | 1.186 | 1.414 | 171.2 | 405.2 | 1440 | 24 | 5.43 | 93.0 | 16.0 |
      Simulation AppleOrchard_M
        Clock: Start=1998-06-01; End=1999-08-01
        Summary SummaryFile
        Weather: FileName=VCS_Turitea.met
        MicroClimate: a_interception=0; b_interception=1; c_interception=0; d_interception=0; SoilHeatFluxFraction=0.4; MinimumHeightDiffForNewLayer=0; NightInterceptionFraction=0.5; ReferenceHeight=2
        SoilArbitrator Soil Arbitrator
        Manager AutoIrrigationDeficitBased
          AllowIrrigation = True
          SeasonStart = 1-oct
          SeasonEnd = 1-apr
          depthPAWC = 1000
          triggerDeficit = 70
          irrigateAmount = 15
          ProportionApplied = 1
          returndays = 3
          IrrigateAlley = False
```csharp
using Newtonsoft.Json;
using APSIM.Shared.Utilities;
using System.Xml.Serialization;
using Models.Soils;
using Models.PMF;
using Models.Core;
using System;
using Models.Interfaces;

        
namespace Models
{
    [Serializable] 
    [System.Xml.Serialization.XmlInclude(typeof(Model))]
    public class Script : Model
    {
        [Link] private Clock Clock;
        [Link] private Zone patch;
        [Link] private ISummary summary;
        //[Link] private Irrigation Irrigation;
        [Link] private Soil Soil;
        [Link(IsOptional = true)] private IPlant existingCrop;
        [Link] private IPhysical soilPhysical;
        [Link] private ISoilWater waterBalance;
        [Link(Type = LinkType.Scoped, ByName = true)] private Zone Row;
        [Link(Type = LinkType.Scoped, ByName = true)] private Zone Alley;
       
        // Parameters from user interface
        [Separator("Manager for controlling automatic irrigation")]
        [Description(" Allow this manager to control irrigation?")]
        public bool AllowIrrigation { get; set; }
      
        [Separator(" Parameters for the irrigation system")]
        [Description(" Start of irrigation season (d-mmm)")]
        public string SeasonStart { get; set; }
        [Description(" End of irrigation season (d-mmm)")]
        public string SeasonEnd { get; set; }
        [Description(" Depth to calculate PAWC and deficit (mm)")]
        public double depthPAWC { get; set; }
        [Description(" Deficit to trigger irrigations (% PAWC)")]
        public double triggerDeficit { get; set; }
        [Description(" Irrigation amount to apply each event (mm)")]
        public double irrigateAmount { get; set; }
        [Description("ProportionOfAppliedWater")]
        public double ProportionApplied { get; set; }
        [Description(" Minimum days for irrigation to return")]
        public double returndays { get; set; }
        
        [Description("Is the Alley zone irrigated?")]
        public bool IrrigateAlley {get; set;}

        //Class members
        [JsonIgnore] public double IrrigLayerSWDeficit { get; set; }
        [JsonIgnore] public double TopSWC { get; set; }
        [JsonIgnore] public double DaysSinceIrrigation { get; set; }
        [JsonIgnore] public double AmountToApply { get; set; }
        [JsonIgnore] public double SeasonAppliedAmount { get; set; }
        
        private bool IrrigationIsAllowed { get; set; }
        private bool SeasonIsOpen { get; set; }
        private bool CropIsActive { get; set; }
        private bool IrrigatorIsAvailable { get; set; }
        private bool SoilIsDry { get; set; }
        private double TopDUL;
        private double TopLL;
        private int nLayers;

    
        //Calculate static soil variables
        [EventSubscribe("StartOfSimulation")]
        private void OnStartOfSimulation(object sender, EventArgs e)
        {
            
            //Can we irrigate at all?
            IrrigationIsAllowed = false; 
            if (AllowIrrigation)
                IrrigationIsAllowed = true; 

            //Calculate soil water variables
            double depthFromSurface = 0.0;
            double fracLayer = 0.0;
            nLayers = soilPhysical.Thickness.Length;
            for (int layer = 0; layer < nLayers; layer++)
            {
                fracLayer = Math.Min(1.0, (depthPAWC - depthFromSurface) / soilPhysical.Thickness[layer]);
                TopLL += soilPhysical.LL15mm[layer] * fracLayer;
                TopDUL += soilPhysical.DULmm[layer] * fracLayer;
                depthFromSurface += soilPhysical.Thickness[layer];
                if (depthFromSurface >= depthPAWC)
                    layer = nLayers;
            }
        }
             
        //Determine daily requirement for irrigation
        [EventSubscribe("StartOfDay")]
        private void OnStartOfDay(object sender, EventArgs e)
        {
            AmountToApply = 0.0;
            DaysSinceIrrigation += 1;

            //Can we irrigate today?          
            SeasonIsOpen = DateUtilities.WithinDates(SeasonStart, Clock.Today, SeasonEnd);
            if (!SeasonIsOpen)
                SeasonAppliedAmount = 0;

            //Is there a crop in the ground that needs irrigation?
            CropIsActive = false;
            if (existingCrop != null)
            {
                string currentCrop = (string)patch.Get("[CropManagement].Script.CurrentCrop");
                if ( existingCrop.IsAlive)
                {
                    CropIsActive = true;
                }
            }
          
            //Is the irrigator available?
            IrrigatorIsAvailable = false;
            if (DaysSinceIrrigation >= returndays)
                IrrigatorIsAvailable = true;
          
            //Is the soil dry enough to require irrigation?
            SoilIsDry = false;
            double depthFromSurface = 0.0;
            double fracLayer = 0.0;
            TopSWC = 0.0;
            for (int layer = 0; layer < nLayers; layer++)
            //for (int layer = 0; depthFromSurface < depthPAWC + soilPhysical.Thickness[layer]; layer++)
            {
                fracLayer = Math.Min(1.0, (depthPAWC - depthFromSurface) / soilPhysical.Thickness[layer]);
                TopSWC += waterBalance.SWmm[layer] * fracLayer;
                depthFromSurface += soilPhysical.Thickness[layer];
                if (depthFromSurface >= depthPAWC)
                    layer = nLayers;
            }
            
            IrrigLayerSWDeficit = TopSWC - TopDUL;
            if (Math.Max(0.0, -IrrigLayerSWDeficit) >= (TopDUL - TopLL) * (100 - triggerDeficit) / 100)
                SoilIsDry = true;

            //Are all the conditions ratifying irrigation
            if (IrrigationIsAllowed && SeasonIsOpen && CropIsActive && IrrigatorIsAvailable && SoilIsDry)
            {
                //Lets irrigate well !!!!
                Irrigation irrigRow = (Irrigation)Row.Get("Irrigation");
                irrigRow.Apply(irrigateAmount * ProportionApplied, depth: 0);
                DaysSinceIrrigation = 0;
                if (IrrigateAlley)
                {
                   Irrigation irrigAlley = (Irrigation)Alley.Get("Irrigation");
                   irrigAlley.Apply(irrigateAmount * ProportionApplied , depth: 0);
                   DaysSinceIrrigation = 0;
            
                }
            }
        }
    }
}
```
        Manager AutomaticFertiliser
          AllowFertiliser = yes
          Depth2SoilN = 500
          CriticalSoilN = 30
          FertNAmount = 50
          FertType = UreaN
          FertApplicationDepth = 10
          FertMinimumDays = 15
```csharp
using Newtonsoft.Json;
using Models.Soils.Nutrients;
using Models.Interfaces;
using System.Xml.Serialization;
using APSIM.Shared.Utilities;
using Models.Soils;
using Models.PMF;
using Models.Core;
using System;

namespace Models
{
    [Serializable]
    public class Script : Model
    {
        [Link] private Clock Clock;
        [Link] private Fertiliser fertiliser;
        [Link] private ISummary summary;
        [Link] private Soil Soil;
        private DateTime lastApplicationDate;
        private bool fertiliserIsAllowed;
        private int nLayers;
        [Link(ByName = true)]
        private ISolute NO3;
        [Link(ByName = true)]
        private ISolute NH4;
        [Link(ByName = true)]
        private ISolute Urea;
        [Link]
        private IPhysical soilPhysical;

        //User inputs from properties tab
        [Description("Turn fertiliser applications on? ")]
        public yesnoType AllowFertiliser { get; set; }
        
        [Description("Depth to calculate available soil N (mm): ")]
        public double Depth2SoilN { get; set; }

        [Description("Minimum available N, triggers an application (kgN/ha): ")]
        public double CriticalSoilN { get; set; }

        [Description("Amount of N fertiliser for each application (kgN/ha): ")]
        public double FertNAmount { get; set; }

        [Description("Type of N fertiliser to apply: ")]
        public Fertiliser.Types FertType { get; set; }

        [Description("Depth at which to apply the fertiliser (mm): ")]
        public double FertApplicationDepth { get; set; }
       
        [Description("Minimum period between applications (days): ")]
        public double FertMinimumDays { get; set; }
       
        public enum yesnoType
        {
            /// <summary>a positive answer</summary>
            yes,
            /// <summary>a negative answer</summary>
            no
        }

        [JsonIgnore] public double TopMineralN { get; set; }
        

        [EventSubscribe("StartOfSimulation")]
        private void OnStartOfSimulation(object sender, EventArgs e)
        {
            fertiliserIsAllowed = (AllowFertiliser == yesnoType.yes);
            nLayers = soilPhysical.Thickness.Length;
        }

        [EventSubscribe("DoManagement")]
        private void OnDoManagement(object sender, EventArgs e)
        {
            double daysSinceLastApplication = (Clock.Today - lastApplicationDate).TotalDays;
            
            // get the N stored in the soil
            double depthFromSurface = 0.0;
            double fracLayer = 0.0;
            TopMineralN = 0.0;
            for (int layer = 0; layer < nLayers; layer++)
            {
                fracLayer = Math.Min(1.0, (Depth2SoilN - depthFromSurface) / soilPhysical.Thickness[layer]);
                TopMineralN += (NO3.kgha[layer]
                + NH4.kgha[layer]
                + Urea.kgha[layer])
                * fracLayer;
                depthFromSurface += soilPhysical.Thickness[layer];
                if (depthFromSurface >= Depth2SoilN)
                    layer = nLayers;
            }

            if (fertiliserIsAllowed && (daysSinceLastApplication >= FertMinimumDays) && (TopMineralN <= CriticalSoilN))
            {
                fertiliser.Apply(FertNAmount, FertType, FertApplicationDepth);
                lastApplicationDate = Clock.Today;
            }
        }
    }
}
```
        Manager ResetDate
          ResetDate = 1-Jun
```csharp
using Newtonsoft.Json;
using Models.PMF.Organs;
using Models.Soils.Nutrients;
using Models.Interfaces;
using System;
using Models.Core;
using System.Collections.Generic;
using System.Text;
using Models.Soils;
using Models.PMF;
using Models;
using System.Xml.Serialization;
using APSIM.Shared.Utilities;
using Models.Climate;



namespace Models
{
    [Serializable] 
    //[System.Xml.Serialization.XmlInclude(typeof(Model))]
    public class Script : Model
    {
    
     [Link] private Clock Clock;
        
    [Separator("Manager to summarise variables")]
        [Description(" Date to end the simulation year and reset: ")]
        public string ResetDate { get; set; }
                  
        [JsonIgnore] public double SimulationYear { get; set; }
        [JsonIgnore] public double DAS { get; set; }
        
         [EventSubscribe("StartOfSimulation")]
        private void DoStartOfSimulation(object sender, EventArgs e)
        {
                DAS = 0;
                SimulationYear = 1971;
        }
        
        [EventSubscribe("StartOfDay")]
        private void OnStartOfDay(object sender, EventArgs e)
        {
            DAS += 1;
            if (DateUtilities.DatesAreEqual(ResetDate, Clock.Today.Date))
            {
                SimulationYear += 1;
                
            }
        }
    
    }
}
```
        RectangularZone Row: Length=100; Width=1.3; Slope=0; AspectAngle=0; Altitude=50
          Report ReportRowOnly: EventNames=[Clock].DoReport
          Report ReportRowAlley: EventNames=[Clock].DoReport
            VariableNames=([Row].Irrigation.IrrigationApplied*[Row].Width + [Alley].Irrigation.IrrigationApplied*[Alley].Width)/([Row].Width + [Alley].Width) as WeightedAverage_IrrigationApplied
          Soil: Latitude=0; Longitude=0
            LayerStructure: Thickness=[200, 200, 200, 200, 200, 200, 300, 300, 400, 800]
            Chemical: Thickness=[100, 200, 300, 300, 300, 300]; PH=[6.6, 6.2, 5.7, 5.5, 5.5, 5.5]; PHUnits=Water
            Water: Thickness=[300, 300, 300, 300, 300, 300, 1200]; InitialValues=[0.42, 0.41, 0.5, 0.46, 0.45, 0.43, 0.43]; InitialPAWmm=702; RelativeTo=LL15; FilledFromTop=false
            WaterBalance SoilWater: SummerDate=1-Nov; SummerU=9; SummerCona=4.4; WinterDate=1-Apr; WinterU=9; WinterCona=4.4; DiffusConst=88; DiffusSlope=35.4; Salb=0.3; CN2Bare=68; CNRed=20; CNCov=0.8; DischargeWidth=0; CatchmentArea=0; PSIDul=-100
              Thickness  SWCON  KLAT
              300        0.55   0
              300        0.55   0
              300        0.55   0
              300        0.55   0
              300        0.1    0
              300        0.02   0
              400        0.02   0
              800        0      0
            Organic: FOMCNRatio=30; CarbonUnits=Total
              Thickness  Carbon  SoilCNRatio  FBiom  FInert  FOM
              100        1.82    11.5         0.025  0.3     1243.93
              200        1.47    11.5         0.025  0.4     833.832
              300        1.2     11.5         0.015  0.75    457.617
              300        1.03    11.5         0.01   0.9     251.145
              300        0.47    11.5         0.01   0.96    137.831
              300        0.47    11.5         0.01   0.96    75.6435
            CERESSoilTemperature Temperature
            OutputLayers: Thickness=[300, 300, 300, 300, 300, 300]
            Solute NO3: Thickness=[100, 200, 300, 300, 300, 300]; InitialValues=[217, 15, 1.66667, 1.66667, 0, 0]; InitialValuesUnits=ppm; WaterTableConcentration=0; D0=0; DepthConstant=0; MaxDepthSoluteAccessible=0; RunoffEffectivenessAtMovingSolute=0; MaxEffectiveRunoff=0
            Solute NH4: Thickness=[100, 200, 300, 300, 300, 300]; InitialValues=[0, 0, 0, 0, 0, 0]; InitialValuesUnits=ppm; WaterTableConcentration=0; D0=0; DepthConstant=0; MaxDepthSoluteAccessible=0; RunoffEffectivenessAtMovingSolute=0; MaxEffectiveRunoff=0
            Solute Urea: Thickness=[100, 200, 300, 300, 300, 300]; InitialValues=[0, 0, 0, 0, 0, 0]; InitialValuesUnits=kg/ha; WaterTableConcentration=0; D0=0; DepthConstant=0; MaxDepthSoluteAccessible=0; RunoffEffectivenessAtMovingSolute=0; MaxEffectiveRunoff=0
            Physical
              Thickness  BD  AirDry  LL15  DUL   SAT   KS
              300        1   0.2     0.2   0.4   0.5   100
              300        1   0.2     0.2   0.4   0.5   100
              300        1   0.25    0.25  0.4   0.5   50
              300        1   0.2     0.2   0.46  0.5   40
              300        1   0.2     0.2   0.45  0.5   40
              300        1   0.2     0.2   0.43  0.53  40
              1200       1   0.2     0.2   0.43  0.53  40
              SoilCrop STRUMSoil: LL=[0.2, 0.2, 0.2, 0.2, 0.2, 0.2, 0.2]; KL=[0.1, 0.1, 0.1, 0.1, 0.1, 0.1, 0.1]; XF=[1, 1, 1, 1, 1, 1, 1]
              SoilCrop SlurpSoil: LL=[0.2, 0.2, 0.2, 0.2, 0.2, 0.2, 0.2]; KL=[0.11, 0.11, 0.11, 0.11, 0.11, 0.11, 0.11]; XF=[1, 1, 1, 1, 1, 1, 1]
            Nutrient
          SurfaceOrganicMatter: InitialResidueName=wheat_stubble; InitialResidueType=wheat; InitialResidueMass=500; InitialStandingFraction=0; InitialCPR=0; InitialCNR=100
          Plant STRUM
          StrumTreeInstance Apple: AgeAtSimulationStart=6; YearsToMaxDimension=6; TrunkMassAtMaxDimension=12; BudBreakDAWS=100; StartFullCanopyDAWS=150; StartLeafFallDAWS=305; EndLeafFallDAWS=330; GRINZ=false; MaxRD=1500; CanopyBaseHeight=1000; MaxPrunedHeight=2800; MaxPrunedWidth=700; RootNConc=0.01; LeafNConc=0.02; TrunkNConc=0.01; FruitNConc=0.02; ExtinctCoeff=0.8; GSMax=0.006; R50=100; WaterStress=false; Number=50; DMC=0.16
            zero: RowSpacing, InterRowSpacing, AlleyZoneWidthFrac, WoodDensity, Proot, Pleaf, Ptrunk, MaxHeight, MaxWidth, BaseCover, MaxCover, RUE, PotentialFWPerFruit, FruitDensity, DAFStartLinearGrowth, DAFEndLinearGrowth, DAFMaxSize, TotalSolarRadiation
          Fertiliser
          Irrigation
          Manager AgrgateZoneVariables
```csharp
using Models.Climate;
using System;
using Models.Core;
using Models.PMF;
using System.Collections.Generic;
using Models.Soils;
using APSIM.Shared.Utilities;
using Models.Zones;
using Models.PMF.Organs;

namespace Models
{
    [Serializable]
    public class Script : Model
    {
        [Link] private Weather weather;
        private RectangularZone AlleyZone {get; set; }
        private RectangularZone RowZone {get; set;}
        private RectangularZone ThisZone {get; set;}
        private double AreaWidth {get; set;}
        public double TotRadn {get; set;}
        public double FRadInt {get; set;}
        public double ET {get; set;}
        public double ES {get; set;}
        public double PET {get; set;}
        public double LAI {get; set;}
        public double Height {get; set;}
        public double RootDepth {get; set;}
        public double PlantWidth {get; set;}
        public double InterceptedRadiation {get; set;}
        public double TreeRadInt {get; set;}


        [EventSubscribe("StartOfSimulation")]
        private void DoStartOfSimulation(object sender, EventArgs e)
        {
               
               ThisZone = this.Parent.Parent as RectangularZone;
               RowZone = this.Parent.Parent.Parent.FindInScope("Row") as RectangularZone;
               AlleyZone = (RectangularZone)this.Parent.Parent.Parent.FindInScope("Alley") as RectangularZone;
               AreaWidth = AlleyZone.Width + RowZone.Width;
               PlantWidth = 0;
        }
        
        [EventSubscribe("DoReportCalculations")]
        private void OnDoReportCalculations(object sender, EventArgs e)
        {

            if (ThisZone.Name == "Row")
                {
                TreeRadInt = (double)RowZone.Get("STRUM.Leaf.RadiationIntercepted") + (double)RowZone.Get("STRUM.Trunk.EnergyBalance.RadiationInterceptedByDead");
                FRadInt = (TreeRadInt * RowZone.Width)/(weather.Radn * AreaWidth);
                InterceptedRadiation = (double)RowZone.Get("STRUM.Leaf.RadiationIntercepted");
                ET = (double)RowZone.Get("STRUM.Leaf.Transpiration") * RowZone.Width/AreaWidth;
                LAI = (double)RowZone.Get("STRUM.Leaf.LAI");
                Height = (double)RowZone.Get("STRUM.Leaf.Height");
                RootDepth = (double)RowZone.Get("STRUM.Root.Depth");
                PlantWidth = (double)RowZone.Get("STRUM.Leaf.Width")/1000;
                }
            else
                {
                FRadInt = ((double)AlleyZone.Get("Slurp.Leaf.RadiationIntercepted") * AlleyZone.Width)/(weather.Radn * AreaWidth);
                InterceptedRadiation = (double)AlleyZone.Get("Slurp.Leaf.RadiationIntercepted");
                ET = (double)AlleyZone.Get("Slurp.Leaf.Transpiration") * ThisZone.Width/AreaWidth;
                LAI = (double)AlleyZone.Get("Slurp.Leaf.LAI");
                Height = (double)AlleyZone.Get("Slurp.Leaf.Height");
                RootDepth = (double)AlleyZone.Get("Slurp.Root.Depth");
                }
            TotRadn = weather.Radn * AreaWidth; 
            ES = (double)ThisZone.Get("Soil.SoilWater.Es") * ThisZone.Width/AreaWidth;
            double PETWidth = Math.Min(Math.Max(PlantWidth,ThisZone.Width),AreaWidth);
            PET = (double)ThisZone.Get("Soil.SoilWater.Eo") * PETWidth/AreaWidth;
        }
    }
}
```
        RectangularZone Alley: Length=100; Width=2.2; Slope=0; AspectAngle=0; Altitude=50
          Report ReportAlleyOnly: EventNames=[Clock].DoReport
          Report ReportRowAlley: EventNames=[Clock].DoReport
            VariableNames=([Row].Irrigation.IrrigationApplied*[Row].Width + [Alley].Irrigation.IrrigationApplied*[Alley].Width)/([Row].Width + [Alley].Width) as WeightedAverage_IrrigationApplied
          Soil: Latitude=0; Longitude=0
            LayerStructure: Thickness=[200, 200, 200, 200, 200, 200, 300, 300, 400, 800]
            Chemical: Thickness=[100, 200, 300, 300, 300, 300]; PH=[6.6, 6.2, 5.7, 5.5, 5.5, 5.5]; PHUnits=Water
            Water: Thickness=[300, 300, 300, 300, 300, 300, 1200]; InitialValues=[0.4, 0.4, 0.4, 0.46, 0.45, 0.43, 0.43]; InitialPAWmm=663; RelativeTo=LL15; FilledFromTop=false
            WaterBalance SoilWater: same as Apple_Scenarios.Apple_MultiSites_Planar.AppleOrchard_M.Row.Soil.SoilWater
            Organic: same as Apple_Scenarios.Apple_MultiSites_Planar.AppleOrchard_M.Row.Soil.Organic
            CERESSoilTemperature Temperature
            OutputLayers: Thickness=[300, 300, 300, 300, 300, 300]
            Solute NO3: same as Apple_Scenarios.Apple_MultiSites_Planar.AppleOrchard_M.Row.Soil.NO3
            Solute NH4: same as Apple_Scenarios.Apple_MultiSites_Planar.AppleOrchard_M.Row.Soil.NH4
            Solute Urea: same as Apple_Scenarios.Apple_MultiSites_Planar.AppleOrchard_M.Row.Soil.Urea
            Physical: same as Apple_Scenarios.Apple_MultiSites_Planar.AppleOrchard_M.Row.Soil.Physical
            Nutrient
          SurfaceOrganicMatter: InitialResidueName=wheat_stubble; InitialResidueType=wheat; InitialResidueMass=500; InitialStandingFraction=0; InitialCPR=0; InitialCNR=100
          Plant Slurp
          Fertiliser
          Irrigation
          Manager SetPastureVariables
            Ext_coef = 0.6
            MaximumHeight = 200
            MinimumHeight = 50
```csharp
using Models.Soils;
using System.Data;
using APSIM.Shared.Utilities;
using System.Xml.Serialization;
using Models;
using Models.PMF;
using System.Text;
using System.Collections.Generic;
using Models.Core;
using System;
using Models.Climate;

namespace Models
{
    [Serializable] 
    //[System.Xml.Serialization.XmlInclude(typeof(Model))]
    public class Script : Model
    {
        [Link] Plant Slurp;
        [Link] Clock Clock;
        [Link] Zone zone;
        [Link] Weather weather;

        
        [Description("Extinction coefficient")]
        public  double Ext_coef { get; set; }
        [Description("Maximum height of leaves")]
        public double MaximumHeight { get; set; }
        [Description("Minimum height of leaves")]
        public double MinimumHeight { get; set; }
        
        public double Cover {get; private set;}
        public double LAI { get; private set; }
                
        [EventSubscribe("StartOfSimulation")]
        private void OnStartOfSimulation(object sender, EventArgs e)
        {
            Cover = 0.5;
        }
        
        [EventSubscribe("StartOfDay")]
        private void OnStartOfDay(object sender, EventArgs e)
        {
            Cover += weather.MeanT * 0.0005;

            if (Cover >= 1.0)
            {
                Cover = 0.75;        
            }

              LAI = Math.Log(1 - Cover) / -Ext_coef;

            object LAIResetValue = LAI;
            zone.Set("Slurp.Leaf.Area.FixedValue", LAIResetValue);  
            object HeightResetValue = MinimumHeight + Cover * (MaximumHeight-MinimumHeight);
            zone.Set("Slurp.Leaf.HeightFunction.FixedValue", HeightResetValue);  
        }
    }
}
```
          Manager SetupPastureRootZones
            UseExtraZone = False
```csharp
using Models.Soils;
using Models.Functions;
using APSIM.Shared.Utilities;
using System.Xml.Serialization;
using Models;
using Models.PMF;
using System.Text;
using System.Collections.Generic;
using Models.Core;
using System;
using Models.PMF.Organs;

namespace Models
{
    [Serializable] 
    public class Script : Model
    {
        [Link] private Plant Slurp;
        [Link] private Clock Clock;
        [Link] private Zone zone;
        [Link(Type = LinkType.Path, Path = "[Slurp].Root")]
        private Root root;

        [Description("Use extra root zone")]
        public bool UseExtraZone { get; set; }

        
        [EventSubscribe("StartOfSimulation")]
        private void OnSimulationCommencing(object sender, EventArgs e)
        {
            //if (UseExtraZone)
            //{
            root.ZoneNamesToGrowRootsIn.Add("Row");
            root.ZoneRootDepths.Add(600);
            NutrientPoolFunctions InitialDM = new NutrientPoolFunctions();
            Constant InitStruct = new Constant();
            InitStruct.FixedValue = 10;
            InitialDM.Structural = InitStruct;
            Constant InitMetab = new Constant();
            InitMetab.FixedValue = 0;
            InitialDM.Metabolic = InitMetab;
            Constant InitStor = new Constant();
            InitStor.FixedValue = 0;
            InitialDM.Storage = InitStor;
            root.ZoneInitialDM.Add(InitialDM);

            //}
        }
    }
}
```
          Manager AgrgateZoneVariables: same as Apple_Scenarios.Apple_MultiSites_Planar.AppleOrchard_M.Row.AgrgateZoneVariables
          Manager PastureInitialisation
            CultivarName = StaticCrop
            InitialRootDepth = 2000
            SowingDate = 1-jun
            RootDepth = 2000
            RFV = 10
            KLReductionFactor = -0.001
            KLReductionDepth = 150
            MaxG = 0.004
            R50 = 150
```csharp
using Models.Interfaces;
using Models.PMF.Organs;
using System;
using Models.Core;
using Models.PMF;
using APSIM.Shared.Utilities;
using Models.Soils;
        
namespace Models
{
    [Serializable] 
    [System.Xml.Serialization.XmlInclude(typeof(Model))]
    public class Script : Model
    {
        [Link] private Plant Slurp;
        [Link] private Clock Clock;
        [Link] private Soil Soil;
        [Link] private Zone zone;
        [Link(Type = LinkType.Path, Path = "[Slurp].Root")]
        private Root root;
        [Link]
        private IPhysical soilPhysical;

        [Display(Type = DisplayType.CultivarName)]
        [Description("Plant Type")]
        public string CultivarName { get; set; }
        [Description("Initial Root Depth")]
        public double InitialRootDepth { get; set; }
       [Description("Initialisation Date (d-mmm)")]
        public string SowingDate { get; set; }
        [Description("Maximum Root Depth")]
        public double RootDepth { get; set; }
        [Description("Roof Front Velocity")]
        public double RFV { get; set; }
        [Description("Factor to change Kl modifier with Depth")]
        public double KLReductionFactor { get; set; }
        [Description("Depth that KL starts to decline")]
        public double KLReductionDepth { get; set; }
        
        public double[] YKLModifiers { get; set; }
        public double[] XDepth { get; set; }
        private double Depth { get; set; }
        
        [Description("Maximum Stomatal Conductance")]
        public double MaxG { get; set; }
        [Description("Stomatal Radn response")]
        public double R50 { get; set; }
        
        [EventSubscribe("DoManagement")]
        private void OnDoManagement(object sender, EventArgs e)
        {
            if  (DateUtilities.DatesEqual(SowingDate, Clock.Today))
            {
                Slurp.Sow(cultivar: CultivarName, population: 1, depth: InitialRootDepth, rowSpacing: 150);
                
                YKLModifiers = new double[soilPhysical.Thickness.Length];
                XDepth = new double[soilPhysical.Thickness.Length];
                Depth = 0;
                for (int layer = 0; layer < soilPhysical.Thickness.Length; layer++)
                {
                    Depth += soilPhysical.Thickness[layer] / 2;  //Add half of the thickness of the current layer so depth is the mid depth of that layer
                    if (Depth <= KLReductionDepth)
                    {
                        YKLModifiers[layer] = 1;
                        XDepth[layer] = Depth;
                    }
                    else
                    {
                        double KLMod = 1 * Math.Exp(-KLReductionFactor * (Depth - KLReductionDepth));
                        YKLModifiers[layer] = KLMod;
                        XDepth[layer] = Depth;
                    }
                    Depth += soilPhysical.Thickness[layer] / 2;  //Add the other half of the current layer so depth is the top of the next layer
                }
                object KLMods = YKLModifiers;
                zone.Set("Slurp.Root.KLModifier.XYPairs.Y", KLMods);
                object Depths = XDepth;
                zone.Set("Slurp.Root.KLModifier.XYPairs.X", Depths);
                object RD = RootDepth;
                zone.Set("Slurp.Root.MaximumRootDepth.FixedValue", RD);
                object RV = RFV;
                zone.Set("Slurp.Root.RootFrontVelocity.Potential.FixedValue", RV);
                object GMaxValue = MaxG;
                zone.Set("Slurp.Leaf.Gsmax350", GMaxValue); 
                object R50Value = R50; 
                zone.Set("Slurp.Leaf.R50", R50Value); 
                
            }
        }
    }
}
```
    Experiment Apple_MultiSitesLT_Planar
      Memo ScenarioDescription
        *	Progressive water stress treatments.

        *	Progressive stress by withholding irrigation monthly  from the end of the irrigation window.

        *	Long-term simulations run continously for 30 years.
      Factors
        Permutation
          Factor Irr: same as Apple_Scenarios.Apple_MultiSites_Planar.Factors.Permutation.Irr
          Factor VCSN_Weather: same as Apple_Scenarios.Apple_MultiSites_Planar.Factors.Permutation.VCSN_Weather
          Factor SoilType
            CompositeFactor Waikiwi_33a2: same as Apple_Scenarios.Apple_MultiSites_Planar.Factors.Permutation.SoilType.Waikiwi_33a2
            CompositeFactor Windermere_16a1: same as Apple_Scenarios.Apple_MultiSites_Planar.Factors.Permutation.SoilType.Windermere_16a1
            CompositeFactor Patua_10a1: Specifications=[Soil]
              Soil Patua_10a1: SoilType=Typic Impeded Allophanic Soils; LocalName=Patua_10a1; Latitude=-41; Longitude=174
                DataSource=Profile descriptions provided by Smap based on the work done by Trevor Webb.
                Chemical: Thickness=[125, 250, 125, 1500, 1000]; PH=[7, 7, 7, 7, 7]; PHUnits=Water
                Physical
                  Thickness  ParticleSizeClay  ParticleSizeSand  ParticleSizeSilt  BD     AirDry  LL15   DUL    SAT    KS
                  125        17.5              35                47.5              0.801  0.116   0.232  0.497  0.607  1920
                  250        22.5              35                42.5              0.765  0.191   0.294  0.447  0.621  1920
                  125        5                 85                10                0.575  0.145   0.145  0.274  0.45   1920
                  300        5                 85                10                0.369  0.092   0.092  0.172  0.266  960
                  300        5                 85                10                0.369  0.092   0.092  0.172  0.266  960
                  300        5                 85                10                0.369  0.092   0.092  0.172  0.266  960
                  300        5                 85                10                0.369  0.092   0.092  0.172  0.266  960
                  300        5                 85                10                0.369  0.092   0.092  0.172  0.266  960
                  1000       5                 85                10                0.369  0.092   0.092  0.172  0.266  960
                  SoilCrop SlurpSoil
                    LL=[0.232, 0.294, 0.145, 0.092, 0.092, 0.092, 0.092, 0.092, 0.092]
                    KL=[0.096, 0.066, 0.038, 0.015, 0, 0, 0, 0, 0]
                    XF=[1, 1, 1, 0.141, 0, 0, 0, 0, 0]
                  SoilCrop STRUMSoil
                    LL=[0.232, 0.294, 0.145, 0.092, 0.092, 0.092, 0.092, 0.092, 0.092]
                    KL=[0.078, 0.078, 0.078, 0.078, 0.078, 0.078, 0.078, 0.078, 0.078]
                    XF=[1, 1, 1, 1, 1, 1, 1, 1, 1]
                WaterBalance SoilWater: same as Apple_Scenarios.Apple_MultiSites_Planar.Factors.Permutation.SoilType.Patua_10a1.Patua_10a1.SoilWater
                Organic: same as Apple_Scenarios.Apple_MultiSites_Planar.Factors.Permutation.SoilType.Patua_10a1.Patua_10a1.Organic
                CERESSoilTemperature Temperature
                Water: Thickness=[125, 250, 125, 300, 300, 300, 300, 300, 1000]; InitialPAWmm=258.875; RelativeTo=LL15; FilledFromTop=false
                  InitialValues=[0.471, 0.432, 0.261, 0.164, 0.164, 0.164, 0.164, 0.164, 0.164]
                LayerStructure: Thickness=[125, 250, 125, 300, 300, 300, 300, 300, 1000]
                Solute NO3: same as Apple_Scenarios.Apple_MultiSites_Planar.Factors.Permutation.SoilType.Patua_10a1.Patua_10a1.NO3
                Solute NH4: same as Apple_Scenarios.Apple_MultiSites_Planar.Factors.Permutation.SoilType.Patua_10a1.Patua_10a1.NH4
                Solute Urea: Thickness=[125, 250, 125, 1500, 1000]; InitialValues=[0, 0, 0, 0, 0]; InitialValuesUnits=kg/ha; WaterTableConcentration=0; D0=0; DepthConstant=0; MaxDepthSoluteAccessible=0; RunoffEffectivenessAtMovingSolute=0; MaxEffectiveRunoff=0
                OutputLayers: Thickness=[300, 300, 300, 300, 300, 300, 1200]
                Nutrient
            Memo Notes: same as Apple_Scenarios.Apple_MultiSites_Planar.Factors.Permutation.SoilType.Notes
      Simulation AppleOrchard_LM
        Memo ExperimentDescription
          *	Based on Green et al 2013 - PFR report for the Hawkes Bay Regional Council

          * 	Location: Hastings, NZ

          *	Cultivar: Pink Lady

          *	Transpiration measured using sap flow sensors.
        Clock: Start=1984-06-01; End=2016-05-31
        Summary SummaryFile
        Weather: FileName=VCS_Turitea.met
        MicroClimate: a_interception=0; b_interception=1; c_interception=0; d_interception=0; SoilHeatFluxFraction=0.4; MinimumHeightDiffForNewLayer=0; NightInterceptionFraction=0.5; ReferenceHeight=2
        SoilArbitrator Soil Arbitrator
        Manager AutomaticFertiliser: same as Apple_Scenarios.Apple_MultiSites_Planar.AppleOrchard_M.AutomaticFertiliser
        Manager AutoIrrigationDeficitBased: same as Apple_Scenarios.Apple_MultiSites_Planar.AppleOrchard_M.AutoIrrigationDeficitBased
        Manager ResetDate
          ResetDate = 1-Jun
```csharp
using Newtonsoft.Json;
using Models.PMF.Organs;
using Models.Soils.Nutrients;
using Models.Interfaces;
using System;
using Models.Core;
using System.Collections.Generic;
using System.Text;
using Models.Soils;
using Models.PMF;
using Models;
using System.Xml.Serialization;
using APSIM.Shared.Utilities;
using Models.Climate;



namespace Models
{
    [Serializable] 
    //[System.Xml.Serialization.XmlInclude(typeof(Model))]
    public class Script : Model
    {
    
     [Link] private Clock Clock;
        
    [Separator("Manager to summarise variables")]
        [Description(" Date to end the simulation year and reset: ")]
        public string ResetDate { get; set; }
                  
        [JsonIgnore] public double SimulationYear { get; set; }
        [JsonIgnore] public double DAS { get; set; }
        
         [EventSubscribe("StartOfSimulation")]
        private void DoStartOfSimulation(object sender, EventArgs e)
        {
                DAS = 0;
                SimulationYear = 1983;
        }
        
        [EventSubscribe("StartOfDay")]
        private void OnStartOfDay(object sender, EventArgs e)
        {
            DAS += 1;
            if (DateUtilities.DatesAreEqual(ResetDate, Clock.Today.Date))
            {
                SimulationYear += 1;
                DAS = 1;
                
            }
        }
    
    }
}
```
        RectangularZone Row: same as Apple_Scenarios.Apple_MultiSites_Planar.AppleOrchard_M.Row
        RectangularZone Alley: Length=100; Width=2.2; Slope=0; AspectAngle=0; Altitude=50
          Report ReportAlleyOnly: EventNames=[Clock].DoReport
          Report ReportRowAlley: EventNames=[Clock].DoReport
            VariableNames=([Row].Irrigation.IrrigationApplied*[Row].Width + [Alley].Irrigation.IrrigationApplied*[Alley].Width)/([Row].Width + [Alley].Width) as WeightedAverage_IrrigationApplied
          Soil: same as Apple_Scenarios.Apple_MultiSites_Planar.AppleOrchard_M.Alley.Soil
          SurfaceOrganicMatter: InitialResidueName=wheat_stubble; InitialResidueType=wheat; InitialResidueMass=500; InitialStandingFraction=0; InitialCPR=0; InitialCNR=100
          Plant Slurp
          Fertiliser
          Irrigation
          Manager PastureInitialisation: same as Apple_Scenarios.Apple_MultiSites_Planar.AppleOrchard_M.Alley.PastureInitialisation
          Manager SetPastureVariables: same as Apple_Scenarios.Apple_MultiSites_Planar.AppleOrchard_M.Alley.SetPastureVariables
          Manager SetupPastureRootZones: same as Apple_Scenarios.Apple_MultiSites_Planar.AppleOrchard_M.Alley.SetupPastureRootZones
          Manager AgrgateZoneVariables: same as Apple_Scenarios.Apple_MultiSites_Planar.AppleOrchard_M.Row.AgrgateZoneVariables
    Experiment Apple_MultiSitesLT_Spindle
      Memo ScenarioDescription
        *	Progressive water stress treatments.

        *	Progressive stress by withholding irrigation monthly  from the end of the irrigation window.

        *	Long-term simulations run continously for 30 years.
      Factors: same as Apple_Scenarios.Apple_MultiSitesLT_Planar.Factors
      Simulation Wide
        Memo ExperimentDescription
          *	Based on Green et al 2013 - PFR report for the Hawkes Bay Regional Council

          * 	Location: Hastings, NZ

          *	Cultivar: Pink Lady

          *	Transpiration measured using sap flow sensors.
        Clock: Start=1984-06-01; End=2016-05-31
        Summary SummaryFile
        Weather: FileName=VCS_Turitea.met
        MicroClimate: a_interception=0; b_interception=1; c_interception=0; d_interception=0; SoilHeatFluxFraction=0.4; MinimumHeightDiffForNewLayer=0; NightInterceptionFraction=0.5; ReferenceHeight=2
        SoilArbitrator Soil Arbitrator
        Manager AutomaticFertiliser: same as Apple_Scenarios.Apple_MultiSites_Planar.AppleOrchard_M.AutomaticFertiliser
        Manager AutoIrrigationDeficitBased: same as Apple_Scenarios.Apple_MultiSites_Planar.AppleOrchard_M.AutoIrrigationDeficitBased
        Manager ResetDate: same as Apple_Scenarios.Apple_MultiSitesLT_Planar.AppleOrchard_LM.ResetDate
        RectangularZone Row: Length=100; Width=2.5; Slope=0; AspectAngle=0; Altitude=50
          Report ReportRowOnly: EventNames=[Clock].DoReport
          Report ReportRowAlley: EventNames=[Clock].DoReport
            VariableNames=([Row].Irrigation.IrrigationApplied*[Row].Width + [Alley].Irrigation.IrrigationApplied*[Alley].Width)/([Row].Width + [Alley].Width) as WeightedAverage_IrrigationApplied
          Soil: same as Apple_Scenarios.Apple_MultiSites_Planar.AppleOrchard_M.Row.Soil
          SurfaceOrganicMatter: InitialResidueName=wheat_stubble; InitialResidueType=wheat; InitialResidueMass=500; InitialStandingFraction=0; InitialCPR=0; InitialCNR=100
          Plant STRUM
          StrumTreeInstance Apple: same as Apple_Scenarios.Apple_MultiSites_Planar.AppleOrchard_M.Row.Apple
          Fertiliser
          Irrigation
          Manager AgrgateZoneVariables: same as Apple_Scenarios.Apple_MultiSites_Planar.AppleOrchard_M.Row.AgrgateZoneVariables
        RectangularZone Alley: same as Apple_Scenarios.Apple_MultiSitesLT_Planar.AppleOrchard_LM.Alley
  Folder Avocado_Scenarios
    Experiment Avocado_MultiSites
      Memo ScenarioDescription
        *	Progressive water stress treatments.

        *	Progressive stress achieved by withholding irrigation approximately biweekly increments during the irrigation window.
      Factors
        Permutation
          Factor Irr: same as Apple_Scenarios.Apple_MultiSites_Planar.Factors.Permutation.Irr
          Factor Season: same as Apple_Scenarios.Apple_MultiSites_Planar.Factors.Permutation.Season
          Factor VCSN_Weather
            CompositeFactor FarNorth: Specifications=[Weather]
              Weather: FileName=WeatherFiles\Kaitaia.met
            CompositeFactor Whangarei: Specifications=[Weather]
              Weather: FileName=WeatherFiles\Whangarei.met
            CompositeFactor BayofPlenty: Specifications=[Weather]
              Weather: FileName=WeatherFiles\Te Puke.met
          Factor SoilType: same as Apple_Scenarios.Apple_MultiSitesLT_Planar.Factors.Permutation.SoilType
      Simulation AvocodoOrchard_M: same as Apple_Scenarios.Apple_MultiSites_Planar.AppleOrchard_M
    Experiment Avocado_MultiSitesLT
      Memo ScenarioDescription
        *	Progressive water stress treatments.

        *	Progressive stress by withholding irrigation monthly  from the end of the irrigation window.

        *	Long-term simulations run continously for 30 years.
      Factors
        Permutation
          Factor Irr: same as Apple_Scenarios.Apple_MultiSites_Planar.Factors.Permutation.Irr
          Factor SoilType: same as Apple_Scenarios.Apple_MultiSitesLT_Planar.Factors.Permutation.SoilType
          Factor VCSN_Weather: same as Avocado_Scenarios.Avocado_MultiSites.Factors.Permutation.VCSN_Weather
      Simulation Wide: same as Apple_Scenarios.Apple_MultiSitesLT_Spindle.Wide
  Folder Kiwifruit_Scenarios
    Experiment Kiwifruit_MultiSites
      Memo ScenarioDescription
        *	Progressive water stress treatments.

        *	Progressive stress achieved by withholding irrigation approximately biweekly increments during the irrigation window.
      Factors
        Permutation
          Factor Irr: same as Apple_Scenarios.Apple_MultiSites_Planar.Factors.Permutation.Irr
          Factor Season: same as Apple_Scenarios.Apple_MultiSites_Planar.Factors.Permutation.Season
          Factor VCSN_Weather
            CompositeFactor FarNorth: Specifications=[Weather]
              Weather: FileName=WeatherFiles\Kaitaia.met
            CompositeFactor BayofPlenty: Specifications=[Weather]
              Weather: FileName=WeatherFiles\Te Puke.met
            CompositeFactor Whangarei: Specifications=[Weather]
              Weather: FileName=WeatherFiles\Whangarei.met
            CompositeFactor PalmerstonNorth: Specifications=[Weather]
              Weather: FileName=VCS_Turitea.met
            CompositeFactor HawkesBay: Specifications=[Weather]
              Weather: FileName=VCS_Jervoistown.met
            CompositeFactor Nelson: Specifications=[Weather]
              Weather: FileName=WeatherFiles\Nelson.met
          Factor SoilType: same as Apple_Scenarios.Apple_MultiSitesLT_Planar.Factors.Permutation.SoilType
      Simulation KiwifruitOrchard_M: same as Apple_Scenarios.Apple_MultiSites_Planar.AppleOrchard_M
    Experiment Kiwifruit_MultiSitesLT
      Memo ScenarioDescription
        *	Progressive water stress treatments.

        *	Progressive stress by withholding irrigation monthly  from the end of the irrigation window.

        *	Long-term simulations run continously for 30 years.
      Factors
        Permutation
          Factor Irr: same as Apple_Scenarios.Apple_MultiSites_Planar.Factors.Permutation.Irr
          Factor SoilType: same as Apple_Scenarios.Apple_MultiSitesLT_Planar.Factors.Permutation.SoilType
          Factor VCSN_Weather: same as Kiwifruit_Scenarios.Kiwifruit_MultiSites.Factors.Permutation.VCSN_Weather
      Simulation Wide1: same as Apple_Scenarios.Apple_MultiSitesLT_Spindle.Wide
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