Simulations: Version=122
  DataStore
  Simulation T1_f0u0
    Clock: Start=2010-12-15; End=2012-08-27
    Summary summaryfile
    Weather
      FileName=C:\aaUnderVC\apsimNextGen\Prototypes\SWIM\Buckthought\Lysimeter Exp.met
    SoilArbitrator
    MicroClimate: a_interception=0; b_interception=1; c_interception=0; d_interception=0; soil_albedo=0.23; SoilHeatFluxFraction=0.4; MinimumHeightDiffForNewLayer=0; NightInterceptionFraction=0.5; ReferenceHeight=2
    Zone paddock: Area=1; Slope=0; AspectAngle=0; Altitude=50
      Manager SetSeepage
        SetSeepage = True
```csharp
using Models.Climate;
using APSIM.Shared.Utilities;
using Models.Soils.Nutrients;
using Models.Soils;
using Models.PMF;
using Models.Core;
using System.Xml.Serialization;
using System;
using Models.Soils.Nutrients;
        
namespace Models
{
    [Serializable] 
    [System.Xml.Serialization.XmlInclude(typeof(Model))]
    public class Script : Model
    {
        [Link] private ISummary summary;
        [Link] private Clock Clock;
        [Link] private Soil soil;
        [Link] private Swim3 swim3;
              
        //User inputs for the Parameters tab
        [Description("Set the lower BC to seepage?")] public bool SetSeepage { get; set; }

        //Not on the UI but available to other models
        //[XmlIgnore] public double HereIsAParameterNotOnTheUI { get; set; }

        //Not on the UI and not available to other models
        //private double HereIsAPrivateParameter { get; set; }
    
        [EventSubscribe("StartOfSimulation")]
      	// code executed only at the start of the simulation
        private void OnStartOfSimulation(object sender, EventArgs e)
        {   
        	if (SetSeepage)
        	{
        		summary.WriteMessage(this, "setting seepage");
        		swim3.bbc_seepage_potential = 0.0;
        	}
        }
             
        //Code executed pretty much at beginning of each day before the other models do their thing
        [EventSubscribe("DoManagement")]
        private void OnDoManagement(object sender, EventArgs e)
        {
        	if (Clock.Today == )
        	{
        		summary.WriteMessage(this, "setting seepage");
        		swim3.bbc_seepage_potential = 0.0;
        	}
        }
        
        /*/Code executed at the end of each day after the other models do their thing but before reporting
        [EventSubscribe("DoManagementCalculations")]
        private void OnDoManagementCalculations(object sender, EventArgs e)
        {
        } */

    }
}
```
      Soil: Latitude=0; Longitude=0
        Physical
          Thickness  BD     AirDry  LL15   DUL    SAT    KS
          60         0.865  0.077   0.231  0.565  0.58   216
          110        0.835  0.069   0.207  0.515  0.606  1188
          140        0.805  0.068   0.205  0.514  0.617  2160
          240        0.83   0.088   0.264  0.475  0.62   3528
          150        0.82   0.097   0.29   0.481  0.625  5376
          SoilCrop WheatSoil (disabled): LL=[0.25, 0.3, 0.3, 0.33, 0.33]; KL=[0.06, 0.06, 0.06, 0.06, 0.06]; XF=[1, 1, 1, 1, 1]
          SoilCrop AGPRyegrassSoil: LL=[0.231, 0.207, 0.205, 0.264, 0.29]; KL=[0.1, 0.1, 0.1, 0.1, 0]; XF=[1, 1, 1, 1, 0]
        SoilNitrogen: fom_types=[default, manure, mucuna, lablab, shemp, stable]; fract_carb=[0.2, 0.3, 0.54, 0.57, 0.45, 0]; fract_cell=[0.7, 0.3, 0.37, 0.37, 0.47, 0.1]; fract_lign=[0.1, 0.4, 0.09, 0.06, 0.08, 0.9]; NPartitionApproach=0
          SoilNitrogenNO3 NO3
          SoilNitrogenNH4 NH4
          SoilNitrogenUrea Urea
          SoilNitrogenPlantAvailableNO3 PlantAvailableNO3
          SoilNitrogenPlantAvailableNH4 PlantAvailableNH4
        Organic: FOMCNRatio=40
          Thickness  Carbon  SoilCNRatio  FBiom  FInert  FOM
          60         8.2     12.5         0.08   0.58    100
          110        5.5     12.5         0.02   0.7     75
          140        3.3     12.5         0.015  0.77    25
          240        1.7     12.5         0.01   0.9     0
          150        1.7     12.5         0.01   0.99    0
        Chemical
          Thickness  NO3N   NH4N   PH   CL
          60         6.503  0.599  5.7  18
          110        2.101  0.1    5.3  13
          140        2.101  0.1    5.9  11
          240        1.701  0.1    6.6  11
          150        1.701  0.1    6.7  16
        Sample Initial water: SWUnits=Volumetric; OCUnits=Total; PHUnits=Water
          Thickness=[100, 200, 200, 200, 200, 200, 200, 200, 200, 200, 200, 200, 200, 200, 200, 200]
          SW=[0.434, 0.43, 0.48, 0.47, 0.46, 0.46, 0.46, 0.485, 0.49, 0.474, 0.457, 0.453, 0.447, 0.465, 0.457, 0.43]
        CERESSoilTemperature Temperature
        Swim3: PrecipitationInterception=0; Salb=0.13; CN2Bare=70; CNRed=20; CNCov=0.8; KDul=0.1; PSIDul=-100; VC=true; DTMin=0; DTMax=1440; MaxWaterIncrement=5; SpaceWeightingFactor=0; SoluteSpaceWeightingFactor=1; Dis=0; Disp=1; A=2; DTHC=0.1; DTHP=2; Diagnostics=true; WaterTable=0
          SwimSoluteParameters NO3: WaterTableConcentration=0; D0=0.05
            Thickness  Exco  FIP
            100        0     1
            200        0     1
            200        0     1
            200        0     1
            200        0     1
            200        0     1
            200        0     1
            200        0     1
            200        0     1
            200        0     1
            200        0     1
            200        0     1
            200        0     1
            200        0     1
            200        0     1
            200        0     1
          SwimSoluteParameters NH4: WaterTableConcentration=0; D0=0.05
            Thickness  Exco  FIP
            100        1     1
            200        1     1
            200        1     1
            200        1     1
            200        1     1
            200        1     1
            200        1     1
            200        1     1
            200        1     1
            200        1     1
            200        1     1
            200        1     1
            200        1     1
            200        1     1
            200        1     1
            200        1     1
          SwimSoluteParameters Urea: same as T1_f0u0.paddock.Soil.Swim3.NO3
          SwimSoluteParameters CL: same as T1_f0u0.paddock.Soil.Swim3.NO3
          SwimSoluteParameters PlantAvailableNH4: same as T1_f0u0.paddock.Soil.Swim3.NH4
          SwimSoluteParameters PlantAvailableNO3: same as T1_f0u0.paddock.Soil.Swim3.NO3
        LayerStructure: Thickness=[10, 20, 30, 40, 50, 50, 50, 50, 100, 100, 50, 50, 50, 50]
      SurfaceOrganicMatter SurfaceOM: InitialResidueName=unknown; InitialResidueType=wheat; InitialResidueMass=0; InitialStandingFraction=1; InitialCPR=0; InitialCNR=100
      Fertiliser
      PastureSpecies AGPRyegrass: InitialShootDM=1500; InitialRootDM=450; InitialRootDepth=550
      Report: EventNames=[Clock].DoReport
        VariableNames:
          [Clock].Today
          [Soil].Swim3.Drainage
          [Soil].Swim3.psi
