Simulations: Version=129
  Simulation T1_f0u0
    Manager Trt
    Weather: FileName=Lysimeter Exp.met
    Clock: Start=2010-12-15; End=2012-08-27
    Summary summaryfile
    SoilArbitrator
    MicroClimate: a_interception=0; b_interception=0; c_interception=0; d_interception=0; soil_albedo=0.23; SoilHeatFluxFraction=0; MinimumHeightDiffForNewLayer=0; NightInterceptionFraction=0; ReferenceHeight=0
    Zone paddock: Area=1; Slope=0; AspectAngle=0; Altitude=50
      Manager SetLowerBC
```csharp
using Models.Climate;
using APSIM.Shared.Utilities;
using Models.Soils.Nutrients;
using Models.Soils;
using Models.PMF;
using Models.Core;
using System.Xml.Serialization;
using System;
using Models.Soils.Nutrients;
using Models.AgPasture;
//using Models.

namespace Models
{
    [Serializable]
    public class Script : Model
    {
        [Link] Clock clock;
        [Link] ISummary summary;
        [Link] private Swim3 swim;
        [Link] private PastureSpecies ryegrass;
        [Link] private SimpleGrazing grazing;

        [EventSubscribe("DoManagement")]
        private void DoDailyCalculations(object sender, EventArgs e)
        {
        	if (clock.Today == clock.StartDate)
        	{
        		summary.WriteMessage(this, "setting bbc potential");
        		swim.bbc_seepage_potential = 0;
        		grazing.GrazeToResidual(0.0);
        		ryegrass.KillCrop(1.0);
        	}
            // Called once per day
        }
    }
}
```
      Soil: Latitude=0; Longitude=0
        Physical
          Thickness  ParticleSizeClay  ParticleSizeSand  ParticleSizeSilt  Rocks  BD     AirDry  LL15   DUL    SAT    KS
          60         17.61             33.77             48.62             0      0.865  0.077   0.231  0.565  0.58   216
          110        16.36             33.91             49.73             0      0.835  0.069   0.207  0.515  0.606  1188
          140        16.42             35.91             47.67             0      0.805  0.068   0.205  0.514  0.617  2160
          240        29.03             46.26             24.71             0      0.83   0.088   0.264  0.475  0.62   3528
          150        18.44             53.54             28.02             0      0.82   0.097   0.29   0.481  0.625  5376
          SoilCrop AgPRyegrassSoil: LL=[0.231, 0.207, 0.205, 0.264, 0.29]; KL=[0.1, 0.1, 0.1, 0.1, 0]; XF=[1, 1, 1, 1, 0]
        SoilNitrogen: fom_types=[default, manure, mucuna, lablab, shemp, stable]; fract_carb=[0.2, 0.3, 0.54, 0.57, 0.45, 0]; fract_cell=[0.7, 0.3, 0.37, 0.37, 0.47, 0.1]; fract_lign=[0.1, 0.4, 0.09, 0.06, 0.08, 0.9]; NPartitionApproach=0
          SoilNitrogenNO3 NO3
          SoilNitrogenNH4 NH4
          SoilNitrogenUrea Urea
          SoilNitrogenPlantAvailableNO3 PlantAvailableNO3
          SoilNitrogenPlantAvailableNH4 PlantAvailableNH4
        Organic: FOMCNRatio=40
          Thickness  Carbon  SoilCNRatio  FBiom  FInert  FOM
          60         8.2     12.5         0.08   0.58    92.873
          110        5.5     12.5         0.02   0.7     57.963
          140        3.3     12.5         0.015  0.77    31.811
          240        1.7     12.5         0.01   0.9     11.373
          150        1.7     12.5         0.01   0.99    5.98
        Chemical
          Thickness  NO3N   NH4N   PH   CL
          60         6.503  0.599  5.7  10
          110        2.101  0.1    5.3  10
          140        2.101  0.1    5.9  10
          240        1.701  0.1    6.6  10
          150        1.701  0.1    6.7  10
        Sample Initial water: Thickness=[60, 110, 140, 240, 150]; SW=[0.58, 0.606, 0.617, 0.62, 0.625]; SWUnits=Volumetric; OCUnits=Total; PHUnits=Water
        CERESSoilTemperature Temperature
        Swim3: PrecipitationInterception=0; Salb=0.13; CN2Bare=0; CNRed=20; CNCov=0.8; KDul=0.1; PSIDul=-100; VC=true; DTMin=0; DTMax=30; MaxWaterIncrement=1; SpaceWeightingFactor=0; SoluteSpaceWeightingFactor=1; Dis=0; Disp=1; A=2; DTHC=0.1; DTHP=2; Diagnostics=true; WaterTable=0
          SwimSoluteParameters Urea: WaterTableConcentration=0; D0=0.05
            Thickness  Exco  FIP
            60         0     1
            110        0     1
            140        0     1
            240        0     1
            150        0     1
          SwimSoluteParameters NH4: WaterTableConcentration=0; D0=0.05
            Thickness  Exco  FIP
            60         1     1
            110        1     1
            140        1     1
            240        1     1
            150        1     1
          SwimSoluteParameters NO3: WaterTableConcentration=0; D0=0.05
            Thickness  Exco  FIP
            60         0     1
            110        0     1
            140        0     1
            240        0     1
            150        0     1
          SwimSoluteParameters CL: WaterTableConcentration=0; D0=0.05
            Thickness  Exco  FIP
            60         0     1
            110        0     1
            140        0     1
            240        0     1
            150        0     1
          SwimSoluteParameters PlantAvailableNH4: WaterTableConcentration=0; D0=0.05
            Thickness  Exco  FIP
            60         1     1
            110        1     1
            140        1     1
            240        1     1
            150        1     1
          SwimSoluteParameters PlantAvailableNO3: WaterTableConcentration=0; D0=0.05
            Thickness  Exco  FIP
            60         0     1
            110        0     1
            140        0     1
            240        0     1
            150        0     1
        Solute CL
        InitialWater Initial water: PercentMethod=0; FractionFull=1
        LayerStructure: Thickness=[10, 20, 30, 40, 50, 50, 50, 50, 100, 100, 50, 50, 50, 50]
      Folder Manager folder
        Manager Exp1_Urine (disabled)
        Manager nh3_volatilisation (disabled)
        Manager Fert (disabled)
        Manager Exp1Report (disabled)
        Manager Seepage (disabled)
```csharp
using Models.PMF;
using Models.Core;
using System;
namespace Models
{
    [Serializable]
    [System.Xml.Serialization.XmlInclude(typeof(Model))]
    public class Script : Model
    {
        [Link] Clock Clock;

        [EventSubscribe("DoManagement")]
        private void OnDoManagement(object sender, EventArgs e)
        {
            /*
                if day = 349 then
   ! set seepage when bottom boundary is saturated
   bbc_seepage_potential = 0
endif
            */
        }
    }
}
```
        Operations Cutting (disabled)
          0001-01-01
          2010-12-21  // agpasture graze type = residue, amount = 1600.00 (kg/ha)
          2011-01-06  // agpasture graze type = residue, amount = 1600.00 (kg/ha)
          2011-02-20  // agpasture graze type = residue, amount = 1600.00 (kg/ha)
          2011-03-23  // agpasture graze type = residue, amount = 1600.00 (kg/ha)
          2011-04-29  // agpasture graze type = residue, amount = 1600.00 (kg/ha)
          2011-04-11  // agpasture graze type = residue, amount = 1600.00 (kg/ha)
          2011-05-31  // agpasture graze type = residue, amount = 1600.00 (kg/ha)
          2011-06-27  // agpasture graze type = residue, amount = 1600.00 (kg/ha)
          2011-07-28  // agpasture graze type = residue, amount = 1600.00 (kg/ha)
          2011-09-06  // agpasture graze type = residue, amount = 1600.00 (kg/ha)
          2011-09-28  // agpasture graze type = residue, amount = 1600.00 (kg/ha)
          2011-10-16  // agpasture graze type = residue, amount = 1600.00 (kg/ha)
          2011-11-03  // agpasture graze type = residue, amount = 1600.00 (kg/ha)
          2011-11-17  // agpasture graze type = residue, amount = 1600.00 (kg/ha)
          2011-12-05  // agpasture graze type = residue, amount = 1600.00 (kg/ha)
          2011-12-19  // agpasture graze type = residue, amount = 1600.00 (kg/ha)
          2012-01-12  // agpasture graze type = residue, amount = 1600.00 (kg/ha)
          2012-02-07  // agpasture graze type = residue, amount = 1600.00 (kg/ha)
          2012-03-13  // agpasture graze type = residue, amount = 1600.00 (kg/ha)
          2012-04-13  // agpasture graze type = residue, amount = 1600.00 (kg/ha)
          2012-05-17  // agpasture graze type = residue, amount = 1600.00 (kg/ha)
          2012-07-02  // agpasture graze type = residue, amount = 1600.00 (kg/ha)
          2012-08-24  // agpasture graze type = residue, amount = 1600.00 (kg/ha)
        Operations NonTrt_Fert (disabled)
          2010-12-21  [Fertiliser].Apply(10, Fertiliser.Types., 1);
          2010-12-21  [Fertiliser].Apply(10, Fertiliser.Types., 10);
          2010-12-21  [Fertiliser].Apply(5, Fertiliser.Types., 20);
          0001-01-01
          0001-01-01
          0001-01-01
        Operations Irrig (disabled)
          2010-12-27  [Irrigation].Apply(5.3);
          2010-12-31  [Irrigation].Apply(5.3);
          2011-01-03  [Irrigation].Apply(5.3);
          2011-01-05  [Irrigation].Apply(5.3);
          2011-01-07  [Irrigation].Apply(5.3);
          2011-01-11  [Irrigation].Apply(5.3);
          2011-01-12  [Irrigation].Apply(95.4);
          2011-01-13  [Irrigation].Apply(53.0);
          2011-01-14  [Irrigation].Apply(106.0);
          2011-01-17  [Irrigation].Apply(79.5);
          2011-01-18  [Irrigation].Apply(106.0);
          2011-01-19  [Irrigation].Apply(106.0);
          2011-01-20  [Irrigation].Apply(106.0);
          2011-01-25  [Irrigation].Apply(79.5);
          2011-01-26  [Irrigation].Apply(53);
          2011-02-21  [Irrigation].Apply(10);
          2011-03-28  [Irrigation].Apply(10);
          2011-05-04  [Irrigation].Apply(10);
          2011-05-31  [Irrigation].Apply(10);
          2011-08-31  [Irrigation].Apply(10);
          2011-09-29  [Irrigation].Apply(10);
          2011-11-07  [Irrigation].Apply(10);
          2011-12-05  [Irrigation].Apply(10);
          2012-02-28  [Irrigation].Apply(10);
          2012-03-30  [Irrigation].Apply(10);
          2012-04-30  [Irrigation].Apply(10);
          2012-05-31  [Irrigation].Apply(10);
          0001-01-01
          0001-01-01
          0001-01-01
      MicroClimate: a_interception=0; b_interception=0; c_interception=0; d_interception=0; soil_albedo=0.23; SoilHeatFluxFraction=0; MinimumHeightDiffForNewLayer=0; NightInterceptionFraction=0; ReferenceHeight=0
      Irrigation
      Fertiliser
      SurfaceOrganicMatter: InitialResidueName=grass; InitialResidueType=grass; InitialResidueMass=20; InitialStandingFraction=0; InitialCPR=0; InitialCNR=17
      SimpleGrazing: GrazingRotationType=2; SimpleMinGrazable=0; SimpleGrazingResidual=0; FlexibleGrazePostDM=0; FractionDefoliatedNToSoil=[0]; CNRatioDung=0; DepthUrineIsAdded=0; FractionPopulationDecline=0; TramplingOn=false; MaximumPropLitterMovedToSoil=0.1; PastureConsumedAtMaximumRateOfLitterRemoval=1200
      PastureSpecies AGPRyegrass: InitialShootDM=1500; InitialRootDM=450; InitialRootDepth=200
      PastureSpecies AGPWhiteClover (disabled): InitialShootDM=500; InitialRootDM=150; InitialRootDepth=350
      Report: EventNames=[Clock].EndOfDay
        VariableNames:
          [Clock].Today as Date
          [Soil].Swim3.psi
          [Soil].Swim3.SW
          [Soil].Swim3.Drainage
          [AgPRyegrass].WaterUptake
  DataStore
  Folder
    Soil OriginalConvertedBuckthought: SoilType=Black Vertosol; Site=Jimbour; NearestTown=Jimbour, Q 4352; Region=South East Queensland; NaturalVegetation=Grassland, mainly Qld bluegrass; Latitude=0; Longitude=0
      Physical
        Thickness  ParticleSizeClay  ParticleSizeSand  ParticleSizeSilt  BD     AirDry  LL15   DUL    SAT    KS
        60         17.61             33.77             48.62             0.865  0.077   0.231  0.565  0.58   216
        110        16.36             33.91             49.73             0.835  0.069   0.207  0.515  0.606  1188
        140        16.42             35.91             47.67             0.805  0.068   0.205  0.514  0.617  2160
        240        29.03             46.26             24.71             0.83   0.088   0.264  0.475  0.62   3528
        150        18.44             53.54             28.02             0.82   0.097   0.29   0.481  0.625  5376
        SoilCrop AGPRyegrassSoil: LL=[0.231, 0.207, 0.205, 0.264, 0.29]; KL=[0.1, 0.1, 0.1, 0.1, 0]; XF=[1, 1, 1, 1, 0]
      Swim3 Swim: Salb=0.13; CNRed=20; CNCov=0.8; KDul=1; PSIDul=-100; VC=true; DTMax=1440; MaxWaterIncrement=10; Diagnostics=false
        zero: PrecipitationInterception, CN2Bare, DTMin, SpaceWeightingFactor, SoluteSpaceWeightingFactor, Dis, Disp, A, DTHC, DTHP, WaterTable
        SwimSoluteParameters: WaterTableConcentration=0; D0=0; Thickness=[200, 180, 100, 140, 80, 999999]
      SoilNitrogen: same as T1_f0u0.paddock.Soil.SoilNitrogen
      CERESSoilTemperature Temperature
      InitialWater Initial water: PercentMethod=0; FractionFull=0.86; RelativeTo=LL15
      Organic: FOMCNRatio=40
        Thickness  Carbon  SoilCNRatio  FBiom  FInert  FOM
        60         8.2     12.5         0.08   0.58    92.8733
        110        5.5     12.5         0.02   0.7     57.9632
        140        3.3     12.5         0.015  0.77    31.8109
        240        1.7     12.5         0.01   0.9     11.3729
        150        1.7     12.5         0.01   0.99    5.97975
      Chemical
        Thickness  NO3N   NH4N      PH
        60         6.503  0.599004  5.7
        110        2.101  0.100001  5.3
        140        2.101  0.100001  5.9
        240        1.701  0.100001  6.6
        150        1.701  0.1       6.7
      LayerStructure: Thickness=[10, 20, 30, 40, 50, 50, 50, 50, 100, 100, 50, 50, 50, 50]
      Sample Initial conditions: Depth=[0-180]; Thickness=[1800]; NH4=[1]; SWUnits=Volumetric; OCUnits=Total; PHUnits=Water
  Simulation TestBBC
    Weather: FileName=Lysimeter Exp.met
    Clock: Start=2010-12-15; End=2012-08-27
    Summary summaryfile
    SoilArbitrator
    MicroClimate: a_interception=0; b_interception=0; c_interception=0; d_interception=0; soil_albedo=0.23; SoilHeatFluxFraction=0; MinimumHeightDiffForNewLayer=0; NightInterceptionFraction=0; ReferenceHeight=0
    Zone paddock: Area=1; Slope=0; AspectAngle=0; Altitude=50
      Manager SetLowerBC
```csharp
using Models.Climate;
using APSIM.Shared.Utilities;
using Models.Soils.Nutrients;
using Models.Soils;
using Models.PMF;
using Models.Core;
using System.Xml.Serialization;
using System;
using Models.Soils.Nutrients;

namespace Models
{
    [Serializable]
    public class Script : Model
    {
        [Link] Clock clock;
        [Link] ISummary summary;
        [Link] private Swim3 swim;

        [EventSubscribe("DoManagement")]
        private void DoDailyCalculations(object sender, EventArgs e)
        {
        	if (clock.Today == clock.StartDate)
        	{
        		summary.WriteMessage(this, "setting bbc potential");
        		swim.bbc_seepage_potential = 0;
        	}
            // Called once per day
        }
    }
}
```
      Soil: same as T1_f0u0.paddock.Soil
      Folder Manager folder: same as T1_f0u0.paddock.Manager folder
      MicroClimate: a_interception=0; b_interception=0; c_interception=0; d_interception=0; soil_albedo=0.23; SoilHeatFluxFraction=0; MinimumHeightDiffForNewLayer=0; NightInterceptionFraction=0; ReferenceHeight=0
      Irrigation
      Fertiliser
      SurfaceOrganicMatter: InitialResidueName=grass; InitialResidueType=grass; InitialResidueMass=20; InitialStandingFraction=0; InitialCPR=0; InitialCNR=17
      Report: EventNames=[Clock].EndOfDay
        VariableNames:
          [Clock].Today as Date
          [Soil].Swim3.psi
          [Soil].Swim3.SW
          [Soil].Swim3.Drainage
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