folder simulations: version=37; creator=Apsim 7.10-r4215
  simulation T1_f0u0
    manager2 Trt
      Treat = 1  # Treatment number
```vb
Imports System
Imports ModelFramework

'This module estimate the amount of NH3 in the soil and its volatilisation

Public Class Script 
   
   <Param> <Output> Private Treat As Integer

   <Output> Private FertLevel As Integer
   <Output> Private UrineLevel As String
   
   <EventHandler()> Public Sub OnInit2()

      If Treat = 1 Then
         FertLevel = 0
         UrineLevel = "none"
      ElseIf Treat = 2 Then
         FertLevel = 0
         UrineLevel = "autumn"
      ElseIf Treat = 3 Then
         FertLevel = 0 
         UrineLevel = "spring"
      ElseIf Treat = 4 Then
         FertLevel = 2
         UrineLevel = "none"
      ElseIf Treat = 5 Then
         FertLevel = 2
         UrineLevel = "autumn"
      ElseIf Treat = 6 Then
         FertLevel = 2
         UrineLevel = "spring"
      ElseIf Treat = 7 Then
         FertLevel = 4
         UrineLevel = "none"
      ElseIf Treat = 8 Then
         FertLevel = 4
         UrineLevel = "autumn"
      ElseIf Treat = 9 Then
         FertLevel = 4
         UrineLevel = "spring"
      Else
         Throw New Exception("Incorrect treatment information")
      End If
      

      End Sub
   

End Class
```
    memo
      19 July - VOS - started drafting the output component.  Done most of them - 'organic' variables left.  Deleted the multiple treatments - easier to put them back in later as links.  Committed (Rev 1672)
      20 July - VOS - finished all the organic variables.  Assumes daily output.  Structure a bit messey but can be tidied later. (Rev 1673)
      21 July - VOS - altered SWIM2, SoilN, SoilTemp, AgPasture to deal with 700 mm deep simulation with a seepage boundary condition (Rev 1674)
      21 July - VOS - updated to latest AgPasture component APSIM rev 1765
      27 July - LEB - updated met-file to 20/7/2011
      18 Aug - VOS - updated to new directory structure
      24 Aug - LEB - Fixed errors in several sets of the observed data.
      24Aug - VOS - changed the output file names so can more easily see the treatments simulated
      24Aug - VOS - changed Exp1Report to do accumualtions of HarvestWt, HarvestN, leach_no3, leach_nh4, and denitrifictions; added ability to not report until the experiment starts
      13Sep - LEB - Updated observed and met files as well as APSIM file
      4Nov11 - LEB Updated observed, met and APSIM file.
      23Nov11 - LEB Updated manager folder info

      13Feb12 - VOS - Converted all the Managers to work with APSIM 7.4 and notified Laura about error with the day in the met file - 7.4

      1-2 Aug 12 - VOS - Fixed error where the reporting had lost the varaibles to report.  Removed the 'speculative' nitrate adsorbtion - reconsider once the lab data have been analysed.
      - nitrate leaching low cf data
      - missing N harvest data
      - N2O VERY high -need ot look in more detail about sources etc
      - Wrong date in one of the DM harvest observeds
      - Really need to construct a mass balance report

      21 November 2012 LEB
      Created graph reports for each treatment.  Solid lines represent simulated data, the dots represent measured data.
      25 Nov 2012:  Phone meeting with Val togo through the measured data vs the simulated data.  Commited this APSIM file as the pure one to go back to if problems arise later.

      25 January 2013
      Val added NH3 Volat to the list of outputs

      Aug 2013:  Outputs for N2O and soil C by layer (detailed 14 layers) prevents the graphs from showing.
    metfile met: filename=Lysimeter Exp.met
    clock
      start_date = 15/12/2010  # Enter the start date of the simulation
      end_date = 27/08/2012  # Enter the end date of the simulation
    summaryfile
    input Input_SiteRainfall (disabled)
      filename=%apsim%_Working\Proj_Laura\Exp1SWIM3\NgahereManualRainfall.met
    manager PatchRainfall (disabled)
      date1 = 01-jan-2011  # Apply site rainfall patch from (dd-mm-yyy)
      date2 = 27-aug-2012  # Apply site rainfall patch until (dd-mm-yyy)
      on prenewmet:
```
if (date_within('[date1], [date2]') = 1) then
   rain = siterain
endif
```
    area paddock
      SoilN_dcd
        root_wt = 1000  # Type the amount of dead roots in the soil (kg/ha)
        root_cn = 50  # Type the C:N ratio of dead roots
        soil_cn = 12.5  # Type the C:N ratio of soil humus
        ph = 6.0   6.0   6.0   6.0   6.0   6.0   6.0   6.0   6.0   6.0   6.0   6.0   6.0   6.0   6.0   6.0   6.0   6.0   6.0   6.0   6.0   6.0  # Type the inital soil pH
        oc = 7.288 7.222 7.156 7.055 6.930 6.804 6.692 6.567 6.454 6.357 6.252 5.246 4.391 3.458 2.559 1.892 1.405 1.050 0.791 0.602 0.432 0.364  # Type the initial soil organic carbon content (%)
        fbiom = 0.080  0.080  0.080  0.080  0.079  0.077  0.072  0.063  0.048  0.031  0.017  0.010  0.008  0.008  0.008  0.008  0.008  0.008  # Type the microbial biomass fraction of OC (0-1)
        finert = 0.543 0.549 0.556 0.562 0.575 0.586 0.597 0.609 0.624 0.635 0.649 0.663 0.683 0.695 0.720 0.736 0.756 0.771 0.790 0.805 0.826 0.840  # Type the inert fraction of soil humus (0-1)
        no3ppm = 4.50  6.00  7.20  7.50  7.50  7.50  7.50  7.50  7.50  7.35  6.90  6.45  6.00  5.55  4.80  4.05  3.45  2.70  2.40  2.13  1.95  1.77  # Type the initial concentration of NO3 is the soil (ppm)
        nh4ppm = 1.50  2.00  2.40  2.50  2.50  2.50  2.50  2.50  2.50  2.45  2.30  2.15  2.00  1.85  1.60  1.35  1.15  0.90  0.80  0.71  0.65  0.59  # Type the initial concentration of NH4 is the soil (ppm)
        ureappm = 0.00  0.00  0.00  0.00  0.00  0.00  0.00  0.00  0.00  0.00  0.00  0.00  0.00  0.00  0.00  0.00  0.00  0.00  0.00  0.00  0.00  0.00  # Type the initial concentration of urea is the soil (ppm)
        nitrification_pot = 40  # Maximum potential nitrification rate (ug NH4/g soil)
        nh4_at_half_pot = 90  # NH4 concentration at half of nitrification rate (ppm)
        opt_temp = 28  # Optimal temperatures for mineralis. and nitrif. (oC)
      SoilTemperature2
        MaxTTimeDefault = 14
        BoundaryLayerConductanceSource = calc
        BoundaryLayerConductance = 20
        BoundaryLayerConductanceIterations = 1
        NetRadiationSource = calc
        DefaultWindSpeed = 3
        DefaultAltitude = 18
        DefaultInstrumentHeight = 1.2
        BareSoilHeight = 57
        Clay = 17.61 17.61 17.61 16.36 16.36 16.42 16.42 16.42 29.03 29.03 18.44 18.44 18.44 18.44
      Soil: SoilType=Black Vertosol; LocalName=Waco; Site=Jimbour; NearestTown=Jimbour, Q 4352; Region=South East Queensland; NaturalVegetation=Grassland, mainly Qld bluegrass; Latitude=0; Longitude=0
        Swim: Salb=0.13; CN2Bare=0; CNRed=20; CNCov=0.8; KDul=1; PSIDul=-100; VC=true; DTmin=0; DTmax=1440; MaxWaterIncrement=10; SpaceWeightingFactor=0; SoluteSpaceWeightingFactor=0; Diagnostics=false
          SwimSoluteParameters: Dis=15; Disp=1; A=1; DTHP=1
            zero: DTHC, WaterTableCl, WaterTableNO3, WaterTableNH4, WaterTableUrea, WaterTableTracer, WaterTableMineralisationInhibitor, WaterTableUreaseInhibitor, WaterTableNitrificationInhibitor, WaterTableDenitrificationInhibitor
            Thickness  NO3Exco  NO3FIP  NH4Exco  NH4FIP  UreaExco  UreaFIP  ClExco  ClFIP  TracerExco  TracerFIP
            200        0        1       16.973   0.721   0         1        0       1      0           1
            180        0        1       24.523   0.635   0         1        0       1      0           1
            100        0        1       29.27    0.586   0         1        0       1      0           1
            140        0        1       51.537   0.442   0         1        0       1      0           1
            80         0        1       37.322   0.517   0         1        0       1      0           1
            999999     -        -       -        -       -         -        -       -      -           -
        InitialWater Initial water: FractionFull=0.86; PercentMethod=FilledFromTop; RelativeTo=ll15
        Water
          Thickness  BD     AirDry  LL15   DUL    SAT    KS
          60         0.865  0.077   0.231  0.565  0.58   216
          110        0.835  0.069   0.207  0.515  0.606  1188
          140        0.805  0.068   0.205  0.514  0.617  2160
          240        0.83   0.088   0.264  0.475  0.62   3528
          150        0.82   0.097   0.29   0.481  0.625  5376
          SoilCrop AgPasture: LL=[0.231, 0.207, 0.205, 0.264, 0.29]; KL=[0.1, 0.1, 0.1, 0.1, 0]; XF=[1, 1, 1, 1, 0]
        SoilOrganicMatter: RootCN=40; RootWt=200; SoilCN=12.5; EnrACoeff=7.4; EnrBCoeff=0.2; OCUnits=Total
          Thickness  OC   FBiom  FInert
          60         8.2  0.08   0.58
          110        5.5  0.02   0.7
          140        3.3  0.015  0.77
          240        1.7  0.01   0.9
          150        1.7  0.01   0.99
        Analysis: PHUnits=Water; BoronUnits=HotWater
          Thickness  PH   CEC   ParticleSizeSand  ParticleSizeSilt  ParticleSizeClay
          60         5.7  28.2  33.77             48.62             17.61
          110        5.3  21    33.91             49.73             16.36
          140        5.9  17.3  35.91             47.67             16.42
          240        6.6  12    46.26             24.71             29.03
          150        6.7  12.9  53.54             28.02             18.44
        Sample Initial nitrogen: NO3Units=ppm; NH4Units=ppm; SWUnits=Volumetric; OCUnits=Total; PHUnits=Water
          Thickness  NO3    NH4
          60         6.503  0.599004
          110        2.101  0.100001
          140        2.101  0.100001
          240        1.701  0.100001
          150        1.701  0.1
        LayerStructure: Thickness=[10, 20, 30, 40, 50, 50, 50, 50, 100, 100, 50, 50, 50, 50]
      folder Manager folder
        manager2 Exp1_Urine
          Urine_Water_to_add = 10  # Type the amount of water to apply (mm)
          Urine_N_to_add = 800  # Type the amount of urea N to apply (kg/ha)
          Br_to_add = 0  # Type the amount of Br to apply (kg/ha)
          Depth_for_urine = 150  # The depth reached by urine (mm)
          AutumnUrinePatch_date_str = 04-may-2011  # Date that autumn urine is applied
          SpringUrinePatch_date_str = 31-aug-2011  # Date that spring urine is applied
```vb
Imports System
Imports ModelFramework

'UrinePatch_start_date

Public Class Script 

   <Link()> Dim MyPaddock As Paddock
   '<Link()> Dim MySWIM As SWIM2ui
   <Link()> Dim MySoilNui As SoilN
   '<Link()> Dim MyBr As Solute
      
   'Parameter variables:
   <param><Output><Units("")> Private AutumnUrinePatch_date_str As String
   <param><Output><Units("")> Private SpringUrinePatch_date_str As String

   <param><Output><Units("mm")> Private Urine_Water_to_add As Single
   <param><Output><Units("kg/ha")> Private Urine_N_to_add As Single
   <param><Output><Units("kg/ha")> Private Br_to_add As Single
   <param> Private Depth_for_urine As Single
   
   'Variables read from other modules
   <Input> Private dd_mmm_yyyy As String     'Today's date
   <Input> Private dlayer As Single()        'Thickness of soil layers (mm)
   <Input> Private sw_dep As Single()
   <Input> Private urea As Single()
   <Input> Private UrineLevel As String    

   'Output variables
   <Output> Private Urine As Single        'Amount of urine applied today
   <Output> Private UrinePatch_date As Date

   'Internal variables
   Private AutumnUrinePatch_date As Date
   Private SpringUrinePatch_date As Date
   Private AppDate As Date                'The date when urine applications start (in date format)
   Private Today As Date              'The date of today (in date format)
   Private Urine_prop As Single()          'The potential proportion of urine for each soil layer
   Private Urine_prop_cum As Single()          'The potential proportion of urine for each soil layer
   Private SoilDepth As Single             'The soil depth (mm)
   Private Add_Urine As Boolean

   <EventHandler()> Public Sub OnInit2()

      'Put the dates into date format:
      AutumnUrinePatch_date = Date.Parse(AutumnUrinePatch_date_str)
      SpringUrinePatch_date = Date.Parse(SpringUrinePatch_date_str)
      
      If UrineLevel.ToLower = "none" Then
         UrinePatch_date = Date.Parse("31-dec-2020")   'ie - not within this simulation
      ElseIf UrineLevel.ToLower = "autumn" Then
         UrinePatch_date = AutumnUrinePatch_date 
      ElseIf UrineLevel.ToLower = "spring" Then
         UrinePatch_date = SpringUrinePatch_date 
      Else
         Throw New Exception("Incorrect urine date information")
      End If
      
        
      ReDim Urine_prop(dlayer.Length - 1)
      ReDim Urine_prop_cum(dlayer.Length - 1)

      SoilDepth = 0.0
      For z As Integer = 0 To dlayer.length - 1
         If SoilDepth <= Depth_for_urine   ' this is at start depth
            Urine_prop(z) = dlayer(z) / Depth_for_urine
         Else
            Urine_prop(z) = 0.0
         End If
         SoilDepth += dlayer(z)   'no updated to end current depth
         
         If z = 0 Then
            Urine_prop_cum(z) = Urine_prop(z)
         Else
            Urine_prop_cum(z) = Urine_prop(z) + Urine_prop_cum(z - 1)
         End If


         If Urine_prop_cum(z) <= 1.0 Then
            ' do nothing
         Else
            Urine_prop(z) = Math.Max(0.0, 1.0 - Urine_prop_cum(z - 1))
            Urine_prop_cum(z) = Urine_prop(z) + Urine_prop_cum(z - 1)
         End If
      Next

   End Sub

   <EventHandler()> Public Sub OnPrepare()
      
      Urine = 0.0
      
      Today = Date.Parse(dd_mmm_yyyy.Replace("_", "/"))
      If Today = UrinePatch_date Then
         Add_Urine = True
      Else
         Add_Urine = False
      End If

      
      If Add_Urine = True Then
         Dim Ini_swdep As Single() = sw_dep
         Dim Ini_urea As Single() = urea
         'Dim Ini_br As Single() = Br

         Urine = Urine_N_to_add

         Dim New_swdep(dlayer.Length-1) As Single         
         Dim New_urea(dlayer.Length-1) As Single
         'Dim New_br(dlayer.Length-1) As Single

         For z As Integer = 0 To dlayer.length - 1
            New_swdep(z) = Ini_swdep(z) + Urine_prop(z) * Urine_Water_to_add
            New_urea(z) = Ini_urea(z) + Urine_prop(z) * Urine_N_to_add
            'New_br(z) = Ini_br(z) + Urine_prop(z) * Br_to_add
         Next

         
         'MySWIM.sw_dep = New_swdep
         MySoilNui.urea = New_urea
         'MyBr = New_br

      End If



   End Sub

End Class
```
        manager2 nh3_volatilisation
          # NH3 volatilisation parameters
          Depth_for_NH3 = 50  # Depth to which NH3 volatilisation is considered (mm)
          # Base soil and pH change parameters
          Soil_pH_base = 5.7 5.7 5.7 5.3 5.3 5.9 5.9 5.9 6.6 6.6 6.7 6.7 6.7 6.7  # The base soil pH for each soil layer
          CEC_strng = 28.2 28.2 28.2 21 21 17.3 17.3 17.3 12 12 12.9 12.9 12.9 12.9  # The CEC for each soil layer (meq/100g)
          k_BC = 0.03  # Soil buffer capacity factor
          k_pH_hyd = 1  # Factor to convert dlt_urea_hydrol into pH changes
          k_pH_nit = 1  # Factor to convert dlt_nh4_nitrif into pH changes
          k_pH_x = 0.2  # Minimum pH fraction decaying per day (0-1)
          # Gas exchange parameters
          k_AFPV = 300  # Factor for soil/atmosphere gas exchange (AFPV/mm)
          f_NV_strng = 1.0 1.0 1.0 0.3 0  # Fractor for volatilisable NH3, per soil layer (0-1)
          # Additional limits for volatilisation
          f_AV = 0.5  # Fraction of total soil NH4 that can be volatilised per day
          CritRain1 = 3  # Rain+irrigation below which volatilisation is not limited (mm)
          CritRain2 = 10  # Rain+irrigation above which no volatilisation occur (mm)
```vb
Imports System
Imports ModelFramework

'This module estimate the amount of NH3 in the soil and its volatilisation

'-->  Last uptaded in: 12/Jul/2011 ..................


Public Class Script 
   
   'Parameter variables:
   <param> Private Depth_for_NH3 As Single            'The depth to which volatilisation is considered (mm)
   <param> Private Soil_pH_base As String             'The base soil pH, apsim will try to keep to this value, same for all layers
   <param> Private CEC_strng As String           'The CEC for each layer (meq/100g)
   <param> Private k_BC As Single                     'Soil buffer capacity factor ()
   <param> Private k_pH_hyd As Single                 'Factor to convert urea hydrolysed into H+ changes ()
   <param> Private k_pH_nit As Single                 'Factor to convert NH4 nitrified into H+ changes ()
   <param> Private k_pH_x As Single                   'Minimum decrease for pH (fraction/day)
   <param> Private k_AFPV As Single                   'Factor to transform potential evaporation in air filled pore volumes that are potential exchanged with to atmosphere
   <param> Private f_NV_strng As String               'The fraction of potential NH3 volatilisation for each layer that is transpoted to the soil surface ()
   <param> Private f_AV As Single                     'Fraction of total soil NH4 that can be volatilised per day, limits volatilisation and ensure mass balance ()
   <param> Private CritRain1 As Single                'Critial rainfall. Below this volatilisation is not limited by rainfall or irrigation
   <param> Private CritRain2 As Single                'Critial rainfall. Above this no volatilisation occurs
    
   'Events to be raised:
   Event ChangeSoilNitrogen As NitrogenChangedDelegate

   'Variables read from other modules
   <Input> Private rain As Single                     'Rainfall (mm)
   <Input> Private eo As Single                       'Potential evapotranspiration (mm)
   <Input> Private irrigation As Single               'Irrigation amount today (mm)
   <Input> Private dlayer As Single()                 'Soil layers thickness
   <Input> Private bd As Single()                     'Soil bulk density (g/cm3 = kg/L)
   <Input> Private sw As Single()                     'Soil water content (cm3/cm3)
   <Input> Private sat As Single()                    'Soil water content at saturarion, porosity (cm3/cm3)
   <Input(IsOptional:=True)> Private ave_soil_temp As Single()    'Soil temperature from SoilTemp - for each layer (oC)
   <Input(IsOptional:=True)> Private st As Single()               'Soil temperature from SoilN - for each layer (oC)
   <Input> Private nh4 As Single()                    'Amount of NH4 in the soil (kg/ha)
   <Input> Private nh4ppm As Single()                 'Amount of NH4 in the soil (ppm)
   <Input> Private conc_water_nh4 As Single()         'Amount of NH4 not adsorbed (ppm)
   <Input> Private dlt_rntrf As Single()              'Amount of N nitrified (kg/ha)   
   <Input> Private dlt_urea_hydrol As Single()        'Amount of urea N hydrolised (kg/ha)
   
   'Output variables
   <Output><Units("ppm")> Public nh3ppm As Single()               'The estimated amount of NH3 in the soil (ppm)
   <Output><Units("kgN/ha")> Public nh3 As Single()               'The estimated amount of NH3 in the soil (kg/ha)
   <Output><Units("g/ha")> Public nh3_gas As Single()             'The estimated amount of NH3 in the soil in gaseous form (g/ha)
   <Output><Units("kgN/ha")> Public emission_nh3 As Single()      'The estimated amount of NH3 volatilised (kg/ha/day)
   <Output><Units("")> Public SoilpH  As Single()                 'dummy soil pH
   <Output><Units("kgN/ha")> Public nh4_sol As Single()           'The amount of NH4 in the soil solution (kg/ha)   
   <Output><Units("oC")> Public SoilTemp As Single()              'The soil temperature (oC)

   <Output><Units("AFPV/day")> Public PotGasExchangeNH As Single  'The potential soil-atmosphere gas exchange (Air-filled-pore-spaces/day)
   <Output><Units("L/m2/day")> Public GasExchangeNH As Single()   'The volume of gas exchanged (L/m2/day)
   <Output><Units("L/m2")> Public AirFilledPoreVolume As Single() 'The volume of air filled pore space in each soil layer (L_air/m2)
   <Output><Units("")> Public NH3toNHx_ratio As Single()          'The ratio between NH3 and NHx in the soil solution
   <Output><Units("x1000")> Public NH3GtoNH3A_ratio As Single()   'The ratio between NH3 liquide and gas in the soil, times 1000
   <Output><Units("")> Public pK_NHx As Single()                  'The equilibrium constant for NH4-NH3
   <Output><Units("")> Public pG_NH3 As Single()                  'The equilibrium constant for NH3A-NH3G

   'Internal variables
   Private NH3_z As Integer                           'The layer to consider NH3 volatilization
   Private f_NV As Single()                           'The fraction of NH3 transport from each layer
   Private Ini_SoilpH As Single()                     'The initial, or base, soil pH
   Private SoilCEC As Single()                        'The CEC (mol/kg)
   
   <EventHandler()> Public Sub OnInit2()

      ReDim SoilpH(dlayer.length - 1)
      ReDim Ini_SoilpH(dlayer.length - 1)

      'Split the read values of f_NV into an array
      f_NV = makeArray(f_NV_strng)
      'Split the read values of pH into an array
      Ini_SoilpH = makeArray(Soil_pH_base)
      'Split the read values of CEC into an array
      SoilCEC = makeArray(CEC_strng)
      ReDim Preserve Ini_SoilpH(dlayer.length - 1)
      ReDim Preserve SoilCEC(dlayer.length - 1)
      'Assign initial pH values and convert CEC from meq to mol
      For z As Integer = 0 To dlayer.length - 1
         Ini_SoilpH(z) = math.Max(0, Ini_SoilpH(z))
         SoilpH(z) = Ini_SoilpH(z)
         SoilCEC(z) = 0.01 * math.Max(0.1, SoilCEC(z))     'mol/kg
      Next

      'Identify the layer down to which volatilization is considered
      Dim Depth_from_surface As Single = 0
      For z As Integer = 0 To dlayer.length - 1
         Depth_from_surface = Depth_from_surface + dlayer(z)
         If Depth_from_surface <= Depth_for_NH3 Then
            NH3_z = z
         Else
            z = dlayer.length
         End If
      Next

      'verify the bounds of the pH converting factor
      k_pH_hyd = math.Min(1, math.Max(0, k_pH_hyd))
      k_pH_nit = math.Min(1, math.Max(0, k_pH_nit))
      k_pH_x = math.Min(1, math.Max(0, k_pH_x))
      k_BC = math.Max(0, k_BC)
      ReDim Preserve f_NV(dlayer.length - 1)
      For z As Integer = 0 To dlayer.length - 1
         f_NV(z) = math.Min(1, math.Max(0, f_NV(z)))
      Next

      '----------- NH3 volatilization ---------------------------------------------------
      Console.WriteLine("")
      Console.WriteLine("Volatilization will be calculated by manager")
      Console.WriteLine("   Top " & Depth_for_NH3.ToString & "mm are considered,")
      Console.WriteLine("   pH variation is mimicked by dlt_urea_hydrol + dlt_nh4_nitrif")
      Console.WriteLine("")

   End Sub

   
   <EventHandler()> Public Sub OnPrepare()
            
      Dim urea_hydrol As Single                    'The amount of urea hydrolised (mol/L)
      Dim nh4_nitrif As Single                     'The amount of NH4 nitrified (mol/L)
      Dim dlt_H As Single                          'Estimated variation of H+ in the soil (mol/L)
      Dim delta_pH_Hyd As Single = 0               'Variation in soil pH due to urea hydrolysis
      Dim delta_pH_Nit As Single = 0               'Variation in soil pH due to NH4 nitrification
      Dim delta_pH_X As Single = 0                 'Minimum decrease in soil pH, to ensure pH returns to base after urea deposition
      Dim delta_pH_Vol As Single = 0               'Variatin in pH due to volatilisation
      Dim Beta As Single = 1                       'The soil buffer capacity ()
      Dim delta_nh4(dlayer.length - 1) As Double   'The variation in NH4 content due to volatilisation (kg/ha)
      Dim RainFactor As Single = 1.0               'The rain factor

      Try  'to get the soil temperature from SoilTemp, otherwise use SoilN's:
         SoilTemp = ave_soil_temp
      Catch
         SoilTemp = st
      End Try
      
      ReDim nh3ppm(dlayer.length - 1)
      ReDim nh4_sol(dlayer.length - 1)
      ReDim nh3(dlayer.length - 1)
      ReDim nh3_gas(dlayer.length - 1)
      ReDim emission_nh3(dlayer.length - 1)
      ReDim GasExchangeNH(dlayer.length - 1)
      ReDim AirFilledPoreVolume(dlayer.length - 1)
      ReDim NH3toNHx_ratio(dlayer.length - 1)
      ReDim NH3GtoNH3A_ratio(dlayer.length - 1)
      ReDim pK_NHx(dlayer.length - 1)
      ReDim pG_NH3(dlayer.length - 1)

      'Calc the irrigation factor
      If Rain + Irrigation < CritRain1 Then
         RainFactor = 1.0
      ElseIf Rain + Irrigation > CritRain2 Then
         RainFactor = 0.0
      Else
         RainFactor = (Rain + Irrigation - CritRain1) / (CritRain2 - CritRain1) 
      End If
      
      '+++++++++++++++++++++++++++++++++++++++++++++++++++++++++++++++++++++++++++++++++++++++++++++++++++++++++++++++++++++++++++
      '  NOTES:
      '     The RainFactor accounts for the downwards transport of NH3 gas when water from rain or irrigation is being drained throught the soil.
      '        Below RainCrit1, precipitation has no effect, above RainCrit2 volatilisation is zero.  A linear relationship is used between
      '        these two limits:
      '
      '                              |
      '                         F   1+                /-----------
      '                       R a    |               /:
      '                       a c    |              / :
      '                       i t    |             /  :
      '                       n o    |            /   :
      '                         r    |           /    :
      '                              |          /     :
      '                              |         /      :
      '                             0+========+-------+--------------> Rain + Irrigation
      '                              |      Rain    Rain
      '                                     Crit1   Crit2
      '+++++++++++++++++++++++++++++++++++++++++++++++++++++++++++++++++++++++++++++++++++++++++++++++++++++++++++++++++++++++++++


      For z As Integer = 0 To dlayer.length - 1
         
         '0-Compute the value of Beta
         Beta = k_BC * bd(z) * SoilCEC(z) / sw(z)

         '1-Compute the consumption of H+ by urea hydrolysis
         urea_hydrol = dlt_urea_hydrol(z) / (dlayer(z) * 10000)   'kg_urea_N/L_soil
         urea_hydrol = urea_hydrol * 1000 / sw(z)                 'g_urea_N/L_water
         urea_hydrol = urea_hydrol / 14.00674                     'mol_urea_N/L_water  - All N pools as expresseed in kg_N, so molecular mass is 14
         dlt_H = -2 * urea_hydrol * k_pH_hyd                      'mol/L

         '2-Compute changes in soil pH due to urea hydrolysis
         If dlt_H < 0 Then
            delta_pH_Hyd = (14 / (1 + ((14 - soilpH(z)) / SoilpH(z)) * 10 ^ (dlt_H / Beta))) - SoilpH(z)
         Else
            delta_pH_Hyd = 0
         End If
         SoilpH(z) = SoilpH(z) + delta_pH_Hyd

         '3-Compute the production of H+ by nitrification and its effect on soil pH
         nh4_nitrif = dlt_rntrf(z) / (dlayer(z) * 10000)          'kg_nh4_N/L_soil
         nh4_nitrif = nh4_nitrif * 1000 / sw(z)                   'g_nh4_N/L_water
         nh4_nitrif = nh4_nitrif / 14.0067                        'mol_nh4_N/L_water  - All N pools as expresseed in kg_N, so molecular mass is 14
         dlt_H = 2 * nh4_nitrif * k_pH_nit                        'mol/L
         If dlt_H > 0 Then
            delta_pH_Nit = (14 / (1 + ((14 - soilpH(z)) / SoilpH(z)) * 10 ^ (dlt_H / Beta))) - SoilpH(z)
         Else
            delta_pH_Nit = 0
         End If
         
         '4-Compute soil forced pH change - this is to ensure pH will decline to its base value
         If SoilpH(z) > Ini_SoilpH(z) Then
            delta_pH_x = -(SoilpH(z) - Ini_SoilpH(z)) * k_pH_x
         Else
            delta_pH_x = 0
         End If
         SoilpH(z) = SoilpH(z) + math.Min(delta_pH_Nit, delta_pH_X)

         '5-bound pH between base and 14
         SoilpH(z) = math.Min(14, math.Max(Ini_SoilpH(z), SoilpH(z)))

         
         '+++++++++++++++++++++++++++++++++++++++++++++++++++++++++++++++++++++++++++++++++++++++++++++++++++++++++++++++++++++++++++
         '  NOTES:
         '     The changes in pH are due to the consumption of H+ as urea is hydrolysed or the production of H+ by nitrification,
         '        in theory for each mol of N hydrolised two mols of H+ are consumed, while two mols are produced by nitrification;
         '     The k_pH_nit ad k_pH_hyd factors allow to control the extent that H+ is affected by hydrolysis and nitrification,
         '        when set to zero there's no effect, while setting it to one causes full theoretical effect
         '     The parameter Beta describes the soil buffer capacity, which is a function of CEC, k_BC is used for adjusting the relationship.
         '     k_pH_x stablish a minimum rate for pH decay, it mimicks soil buffering and other reactions that bring pH down
         '        after urea/urine deposition. Used when nitrification is not enough to bring the pH down.
         '+++++++++++++++++++++++++++++++++++++++++++++++++++++++++++++++++++++++++++++++++++++++++++++++++++++++++++++++++++++++++++


         '6-compute the NH3 equilibrium factors
         pK_NHx(z) = pK("aq", soilTemp(z) + 273.15)      'Aqueous equilibrium [NH4 <--> NH3]
         pG_NH3(z) = pK("gs", soilTemp(z) + 273.15)      'Gaseous equilibrium [NH3_liquid <--> NH3_gas]
         
         '7-Calc the proportion of total NHx that is in the form of NH3
         Dim NH3toNHx As Single = 1 / (1 + 10 ^ (pK_NHx(z) - SoilpH(z)))
         NH3toNHx_ratio(z) = NH3toNHx
         
         '8-Calc the amount of NH3 in aqueous solution (original equation uses mol/L, thus the ratio of molecular mass is needed)
         nh3ppm(z) = conc_water_nh4(z) * NH3toNHx * (17.03 / 18.04 )      'ppm (ug/cm3_water)
         
         '9-Calc the proportion of total NH3 that is in the gaseous form
         Dim NH3GtoNH3A As Single = 1 / (1 + 10 ^ (pG_NH3(z)))
         NH3GtoNH3A_ratio(z) = NH3GtoNH3A * 1000
         
         '10-Calc the amount of NH3 in gaseous form
         nh3_gas(z) = nh3ppm(z) * NH3GtoNH3A                   'ppm (ug/cm3_air in soil = mg/L)

         '11-Calc the amount of NH3 in gaseous form and the amount effectivelly lost by volatilization
         PotGasExchangeNH = eo * k_AFPV   'air filled pore volumes/day
         AirFilledPoreVolume(z) = (sat(z) - sw(z)) * dlayer(z)    'L_air/m2
         If z <= NH3_z Then
            GasExchangeNH(z) = PotGasExchangeNH * AirFilledPoreVolume(z)      'L_air/m2/day
            GasExchangeNH(z) = GasExchangeNH(z) * RainFactor
            If GasExchangeNH(z) > 0 Then
               emission_nh3(z) = nh3_gas(z) * GasExchangeNH(z) * f_NV(z)      'mg/m2
               emission_nh3(z) = emission_nh3(z) * 10E+4                      'mg/ha
               emission_nh3(z) = emission_nh3(z) * 10E-6                      'kg/ha
            Else
               emission_nh3(z) = 0
            End If
            'Limit volatilisation to a fraction of NH4 for each layer
            emission_nh3(z) = Math.Min(emission_nh3(z), f_AV * nh4(z))
         Else
            GasExchangeNH(z) = 0
            emission_nh3(z) = 0
         End If
         
         
         '+++++++++++++++++++++++++++++++++++++++++++++++++++++++++++++++++++++++++++++++++++++++++++++++++++++++++++++++++++++++++++
         '  NOTES:
         '     To estimate the amount of NH3 volatilised during the day, it is assumed that the amount of NH3 in gaseous form in the
         '        beginning of the day represents well the proportion of NHx 'volatilisable'. It is assumed also that the potential evaporation
         '        is a good estimator for the gas exchange between soil and atmosphere (this makes volatilisation sensible to temperature and
         '        wind).  By scaling the gas exchange to the air filled pore space in the soil, we get volatilisation also sensible to water
         '        content, which mimicks the decrease in gas transport when the soil is wet.  Finally a factor (f_NV) is used to limit the
         '        contribution of each soil layer to the overall volatilisation (deep layers would volatilise less because NH3 needs to move
         '        transport to the surface.
         '+++++++++++++++++++++++++++++++++++++++++++++++++++++++++++++++++++++++++++++++++++++++++++++++++++++++++++++++++++++++++++

         
         '12-Compute soil pH change due to volatilisation
         Dim emission_nh3ised As Single = emission_nh3(z) / (dlayer(z) * 10000)  'kg_nh3_N/L_soil
         emission_nh3ised = emission_nh3ised * 1000 / sw(z)                      'g_nh3_N/L_water
         emission_nh3ised = emission_nh3ised / 14.0067                           'mol_nh3_N/L_water  - All N pools as expresseed in kg_N, so molecular mass is 14
         dlt_H = emission_nh3ised                                                'mol/L
         If dlt_H > 0 Then
            delta_pH_vol = (14 / (1 + ((14 - soilpH(z)) / SoilpH(z)) * 10 ^ (dlt_H / Beta))) - SoilpH(z)
         Else
            delta_pH_vol = 0
         End If

         '13- Calc new pH and bound it between base and 14
         SoilpH(z) = SoilpH(z) + delta_pH_vol
         SoilpH(z) = math.Min(14, math.Max(Ini_SoilpH(z), SoilpH(z)))

         '14-Transform variables to publishable units
         nh3(z) = nh3ppm(z) * sw(z) / 1000                     'mg/cm3_soil = g/L_soil
         nh3(z) = nh3(z) * dlayer(z) * 10000                   'g/ha_soil
         nh3(z) = nh3(z) / 1000                                'kg/ha

         nh3_gas(z) = nh3_gas(z) * (sat(z) - sw(z)) / 1000     'mg/cm3_soil = g/L_soil
         nh3_gas(z) = nh3_gas(z) * dlayer(z) * 10000           'g/ha_soil

         nh4_sol(z) = conc_water_nh4(z) * sw(z) / 1000         'mg/cm3_soil = g/L_soil
         nh4_sol(z) = nh4_sol(z) * dlayer(z) * 10000           'g/ha_soil
         nh4_sol(z) = nh4_sol(z) / 1000                        'kg/ha

         'Compute the delta in nh4 amount
         delta_nh4(z) = -emission_nh3(z)
      Next
      
      'send the delta nh4 to soil
      Dim NitrogenChanges As NitrogenChangedType = New NitrogenChangedType
      NitrogenChanges.DeltaNH4 = delta_nh4
      NitrogenChanges.DeltaNO3 = New Double() {}
      RaiseEvent ChangeSoilNitrogen(NitrogenChanges)     

   End Sub
      

   Function makeArray(ByVal ArrayString As String) As Single()
      
      'Get the string with values from the user interface and put the values in an numeric array
      
      Dim MyArray_string As String()
      Dim MyArray_single As Single()
      Dim Separator As Char() = " "
      
      '1-Split string into array
      MyArray_string = ArrayString.Split(Separator, StringSplitOptions.RemoveEmptyEntries)
      
      '2-convert array into type single
      ReDim MyArray_single(MyArray_string.Length - 1)      
      For i As Integer = 0 To MyArray_single.length - 1
         MyArray_single(i) = MyArray_string(i)
      Next
      Return MyArray_single
      
   End Function

   
   Function pK(ByVal N_species As String, ByVal Temp As Single) As Single
      
      'Calculates the equilibrium constants, 
      '  if 'aq' then nh4-nh3 equilibrium in water
      '  if 'gs' then gas-liquid equilibrium for nh3
      
      Dim a_pK As Single() = {0.09018, -1.69}
      Dim b_pK As Single() = {2729.92, 1477.7}
      Dim sp As Integer
      
      If n_species = "aq" Then
         sp = 0
      ElseIf n_species = "gs"
         sp = 1
      End If
      pK = a_pK(sp) + b_pK(sp) / Temp
         
   End Function
   
End Class
```
        manager2 Fert
          FertDates_str = 21-feb-2011 28-mar-2011 04-may-2011 31-may-2011 31-aug-2011 29-sep-2011 7-nov-2011 5-dec-2011 28-feb-2012 30-mar-2012 30-apr-2012 31-may-2012  # Dates for fertiliser applications
```vb
Imports System
Imports ModelFramework

'This module estimate the amount of NH3 in the soil and its volatilisation

Public Class Script 

   <Link()> Dim MyPaddock As Paddock
   <Link()> Dim MyFert As Fertiliser
   
   <Param> Private FertDates_str As String


   <Input> Private FertLevel As Integer
   <Input> Private dd_mmm_yyyy As String     'Today's date

   Private FertAmt As Single
   <Output> Private FertDates_strArr As String()
   Private FertDates As Date()
   Private Today As Date              'The date of today (in date format)
   Private Add_fert As Boolean
   
   <EventHandler()> Public Sub OnInit2()
      
      If FertLevel = 0 Then
         FertAmt = 0.0
      ElseIf FertLevel = 2 Then
         FertAmt = 25.0
      ElseIf FertLevel = 4 Then
         FertAmt = 50.0
      Else
         Throw New Exception("Incorrect fertilser level information")
      End If
      
      FertDates_strArr = makeArray(FertDates_str)
      ReDim FertDates(FertDates_strArr.length - 1)

      For i As Integer = 0 To FertDates_strArr.Length - 1
         FertDates(i) = Date.Parse(FertDates_strArr(i))
      Next

   End Sub
   
   <EventHandler()> Public Sub OnPrepare()

      Today = Date.Parse(dd_mmm_yyyy.Replace("_", "/"))

      Add_Fert = False
      For i As Integer = 0 To FertDates.length - 1
         If Today = FertDates(i) Then
            Add_Fert = True
            
            Dim FertApp As FertiliserApplicationType = New FertiliserApplicationType()

            FertApp.Amount = FertAmt * 1.0
            FertApp.Depth = 5.0
            FertApp.Type = "urea"
            MyFert.Apply(FertApp)

            'FertApp.Amount = FertAmt * 0.4
            'FertApp.Depth = 10.0
            'FertApp.Type = "urea"
            'MyFert.Apply(FertApp)

            'FertApp.Amount = FertAmt * 0.4
            'FertApp.Depth = 20.0
            'FertApp.Type = "urea"
            'MyFert.Apply(FertApp)


         End If
      Next



      
      
      
   End Sub

   Function makeArray(ByVal ArrayString As String) As String()
      
      Dim MyArray_string As String()
      'Dim MyArray_single As String()
      Dim Separator As Char() = " "
      
      '1-Split string into array
      MyArray_string = ArrayString.Split(Separator, StringSplitOptions.RemoveEmptyEntries)
      
      '      '2-convert array into type single
      '      ReDim MyArray_single(MyArray_string.Length - 1)      
      '      For i As Integer = 0 To MyArray_single.length - 1
      '         MyArray_single(i) = MyArray_string(i)
      '      Next
      Return MyArray_string
      
   End Function


End Class
```
        manager2 Exp1Report
          ReportStart_str = 21/02/2011  # Date to start the reporting
          AccumStart_str = 21/02/2011  # Date to start the accumulation calculations
          ReportModuleName = Sim  # Name of the Reporting module
          ResetCum = no  # Reset the accumulation every year?
          ReportingFreq = Daily  # Reporting frequency
```vb
Imports System
Imports ModelFramework


Public Class Script 
   
   <Link()> Dim MyPaddock As Paddock
   '<Link()> Dim MySWIM As SWIM2ui
   <Link()> Dim MySoilN As SoilN
   <Link()> Dim MyIrrig As Irrigation
   <Link()> Dim MyFert As Fertiliser
   <Link()> Dim MyOutput As Outputfile

   'My properties
   <Param> Private ReportingFreq As String   '<Param> Private ReportingFreq As String
   <Param> Private AccumStart_str As String
   <Param> Private ReportStart_str As String
   <Param> Private ReportModuleName As String
   <Param> Private ResetCum As String

   
   'Time type information 
   <Input> Private dd_mmm_yyyy As String     'Today's date
   <Input> Private day As Integer
   <Input> Private year As Integer
   <Input> Private day_of_month As Integer
   <Input> Private end_week As Boolean
   <Input> Private end_month As Boolean
   <Input> Private end_year As Boolean
   <Input> Private simulation_end_day As Integer
   <Input> Private simulation_end_year As Integer
   <Input> Private simulation_days As Integer
   
   
   <Output><Units("")> Public DaysInAve As Integer
   <Output><Units("")> Public DaysInCum As Integer
   <Output><Units("")> Public DaysAfterStart As Integer
   <Output><Units("")> Public end_sim As Integer
   
   <Input> Private dlayer As Single()         'Thickness of soil layers (mm)
   
   Private Today As Date                      'The date of today (in date format)
   Private AccumStart As Date                 'Date to start the accumulations
   Private ReportStart As Date                'Date to start the reporting
   <Output>Private ReportToday As Integer     
   <Output>Private ReportYesterday As Integer 
   
   
   <Input>  Private rain As Single
   <Input>  Private Irrigation as Single
   <Output><Units("mm")> Private CumPrecip As Single

   <Input>  Private sw_dep As Single()
   <Input>  Private sat_dep As Single()
   <Input>  Private dul_dep As Single()
   <Input>  Private ll15_dep As Single()
   <Output><Units("mm")> Private Satdep As Single()
   <Output><Units("mm")> Private Duldep As Single()
   <Output><Units("mm")> Private ll15dep As Single()
   <Output><Units("mm")> Private SWdep As Single()
   
   <Input>  Private drain As Single
   <Output><Units("mm")> Private CumDrain As Single
   
   <Input>  Private sw As Single()
   <Output><Units("kg/ha")> Private SW_l As Single()
   <Input>  Private dul As Single()
   <Output><Units("kg/ha")> Private Dul_l As Single()
   <Input>  Private ll15 As Single()
   <Output><Units("kg/ha")> Private ll15_l As Single()
   
   
   <Input>  Private urea As Single()
   <Output><Units("kg/ha")> Private urea_l As Single()
   <Input>  Private nh4 As Single()
   <Output><Units("kg/ha")> Private nh4_l As Single()
   <Input>  Private no3 As Single()
   <Output><Units("kg/ha")> Private no3_l As Single()

   '<Input>  Private SoilpH As Single()
   '<Output><Units("kg/ha")> Private SoilpH_l As Single()

   <Input>  Private biom_n As Single()
   <Output><Units("kg/ha")> Private biom_n_l As Single()

   <Input>  Private fom_n As Single()
   <Output><Units("kg/ha")> Private fom_n_l As Single()

   <Input>  Private hum_n As Single()
   <Output><Units("kg/ha")> Private hum_n_l As Single()

   <Output><Units("kg/ha")> Private org_n_l As Single()
   <Output><Units("kg/ha")> Private min_n_l As Single()
   <Output><Units("kg/ha")> Private dlt_biom_n_l As Single()
   <Output><Units("kg/ha")> Private dlt_fom_n_l As Single()
   <Output><Units("kg/ha")> Private dlt_hum_n_l As Single()
   <Output><Units("kg/ha")> Private dlt_org_n_l As Single()
   <Output><Units("kg/ha")> Private dlt_min_n_l As Single()
   
   <Input>  Private HarvestedWt As Single
   <Output><Units("mm")> Private cumHarvestWt As Single
   <Input>  Private HarvestedN As Single
   <Output><Units("mm")> Private cumHarvestN As Single

   <Input>  Private leach_no3 As Single
   <Output><Units("mm")> Private cumleach_no3 As Single
   <Input>  Private leach_nh4 As Single
   <Output><Units("mm")> Private cumleach_nh4 As Single

   <Input>  Private dnit As Single()
   <Output><Units("kg/ha")> Private cum_dnit As Single
   <Input>  Private n2o_atm As Single()
   <Output><Units("kg/ha")> Private cum_n2o_atm As Single

   
   
   Private ini_biom_n_l As Single()
   Private ini_fom_n_l As Single()
   Private ini_hum_n_l As Single()
   Private ini_org_n_l As Single()
   Private ini_min_n_l As Single()

   Private OutStartDepth As Single()
   Private OutEndDepth As Single()
   Private NumDepths As Integer
   Private WeightsArray As Single(,)
   Private SimStartDepth As Single()
   Private SimEndDepth As Single()


   <EventHandler()> Public Sub OnInit2()
      
      
      'ReportingFreq = "never"
      'ReportStart_str = "01/01/1900"
      
      
      NumDepths = 5
      ReDim OutStartDepth(NumDepths - 1)
      ReDim OutEndDepth(NumDepths - 1)
      ReDim WeightsArray(dlayer.Length - 1, NumDepths - 1)
      
      ReDim Satdep(NumDepths - 1)
      ReDim Duldep(NumDepths - 1)
      ReDim ll15dep(NumDepths - 1)
      ReDim SWdep(NumDepths - 1)
      ReDim Dul_l(NumDepths - 1)
      ReDim ll15_l(NumDepths - 1)
      ReDim SW_l(NumDepths - 1)
      ReDim urea_l(NumDepths - 1)
      ReDim nh4_l(NumDepths - 1)
      ReDim no3_l(NumDepths - 1)
      'ReDim SoilpH_l(NumDepths - 1)
      ReDim biom_n_l(NumDepths - 1)
      ReDim fom_n_l(NumDepths - 1)
      ReDim hum_n_l(NumDepths - 1)
      ReDim org_n_l(NumDepths - 1)
      ReDim min_n_l(NumDepths - 1)

      ReDim dlt_biom_n_l(NumDepths - 1)
      ReDim dlt_fom_n_l(NumDepths - 1)
      ReDim dlt_hum_n_l(NumDepths - 1)
      ReDim dlt_org_n_l(NumDepths - 1)
      ReDim dlt_min_n_l(NumDepths - 1)
      ReDim ini_biom_n_l(NumDepths - 1)
      ReDim ini_fom_n_l(NumDepths - 1)
      ReDim ini_hum_n_l(NumDepths - 1)
      ReDim ini_org_n_l(NumDepths - 1)
      ReDim ini_min_n_l(NumDepths - 1)

      
      OutStartDepth(0) = 0.0: OutEndDepth(0) = 20.0
      OutStartDepth(1) = 20.0: OutEndDepth(1) = 100.0
      OutStartDepth(2) = 100.0: OutEndDepth(2) = 200.0
      OutStartDepth(3) = 200.0: OutEndDepth(3) = 700.0
      OutStartDepth(4) = 0.0: OutEndDepth(4) = 700.0

      'For OutLayer As Integer = 0 To NumDepths - 2
      '   OutEndDepth(OutLayer) = OutStartDepth(OutLayer + 1)
      'Next
      'OutStartDepth(4) = 0.0
      'OutEndDepth(NumDepths - 1) = 1500.0
      
      Dim SimStartDepth As Single()
      Dim SimEndDepth As Single()
      ReDim SimStartDepth(dlayer.length - 1)
      ReDim SimEndDepth(dlayer.length - 1)
      SimStartDepth(0) = 0.0
      SimEndDepth(0) = dlayer(0)
      For SimLayer As Integer = 1 To dlayer.length - 1
         SimStartDepth(SimLayer) = SimEndDepth(SimLayer - 1)
         SimEndDepth(SimLayer) = SimEndDepth(SimLayer - 1) + dlayer(SimLayer)
      Next

      
      For OutLayer As Integer = 0 To NumDepths - 1
         For SimLayer As Integer = 0 To dlayer.length - 1

            'If (SimEndDepth(SimLayer) <= OutStartDepth(OutLayer)) Then 
            '   'OutLayer above SimLayer 
            '   WeightsArray(SimLayer, OutLayer) = 0.0
            '
            'ElseIf (SimStartDepth(SimLayer) >= OutEndDepth(OutLayer)) Then
            '   'OutLayer below SimLayer 
            '   WeightsArray(SimLayer, OutLayer) = 0.0
            '
            'ElseIf (SimStartDepth(SimLayer) >= OutStartDepth(OutLayer)) And (SimEndDepth(SimLayer) <= OutEndDepth(OutLayer))  Then
            '   'OutLayer includes all of SimLayer 
            '   WeightsArray(SimLayer, OutLayer) = 1.0
            '
            '            ElseIf (SimEndDepth(SimLayer) >= OutStartDepth(OutLayer)) And (SimEndDepth(SimLayer) <= OutEndDepth(OutLayer)) Then          
            '   'OutLayer includes lower part Of SimLayer 
            '    WeightsArray(SimLayer, OutLayer) = (SimEndDepth(SimLayer) - OutStartDepth(OutLayer)) / (SimEndDepth(SimLayer) - SimStartDepth(SimLayer))
            ' 
            ' 
            ' ElseIf (SimStartDepth(SimLayer) <= OutEndDepth(OutLayer)) And (SimEndDepth(SimLayer) >= OutEndDepth(OutLayer)) Then
            '    'OutLayer includes upper part of SimLayer 
            '    WeightsArray(SimLayer, OutLayer) = (OutEndDepth(OutLayer) - SimStartDepth(SimLayer)) / (SimEndDepth(SimLayer) - SimStartDepth(SimLayer))
            '    
            ' Else 
            '    Console.WriteLine("Output Layer: " & OutLayer & "  " & OutStartDepth(OutLayer) & "  " & OutEndDepth(OutLayer))
            '    Console.WriteLine("Simula Layer: " & SimLayer & "  " & SimStartDepth(SimLayer) & "  " & SimEndDepth(SimLayer))
            '    Throw New Exception("Something wrong with the layer weightings")
            '    
            ' End If 
            
            WeightsArray(SimLayer, OutLayer) = Math.MAX(0.0, Math.MIN(Math.MIN(OutEndDepth(OutLayer), SimEndDepth(SimLayer)) - OutStartDepth(OutLayer), Math.MIN(OutEndDepth(OutLayer), SimEndDepth(SimLayer)) - SimStartDepth(SimLayer))) 
            WeightsArray(SimLayer, OutLayer) = WeightsArray(SimLayer, OutLayer) / (SimEndDepth(SimLayer) - SimStartDepth(SimLayer))
         
         Next  'SimLayer
      Next     'OutLayer

      Console.WriteLine("Array of Weights")
      For SimLayer As Integer = 0 To dlayer.length - 1
         Dim Line2Write As String = "End depth (mm): " & SimEndDepth(SimLayer)
         For i As Integer = 0 To NumDepths - 1
            Line2Write += "   " & WeightsArray(SimLayer, i)
         Next
         Console.WriteLine(Line2Write)
      Next  'SimLayer 
      
      
   AccumStart = Date.Parse(AccumStart_str)
   ReportStart = Date.Parse(ReportStart_str)
   ReportYesterday = 1
      
   End Sub

<EventHandler()> Public Sub OnPrepare()

   Today = Date.Parse(dd_mmm_yyyy.Replace("_", "/"))
   If (day = simulation_end_day) And (year = simulation_end_year) Then
      end_sim = 1
   End If

   ReportToday = 0      
   If Today >= ReportStart Then
      DaysAfterStart += 1
         If ReportingFreq.ToLower = "daily" Then
            ReportToday = 1
         ElseIf ReportingFreq.ToLower = "weekly" Then
            If end_week = 1 Then
               ReportToday = 1
            End If
         ElseIf ReportingFreq.ToLower = "tendaily" Then
            If (day_of_month = 10) Or (day_of_month = 20) Or (end_month = 1) Then
               ReportToday = 1
            End If
         ElseIf ReportingFreq.ToLower = "monthly" Then
            If end_month = 1 Then
               ReportToday = 1
            End If
         ElseIf ReportingFreq.ToLower = "annual" Then
            If end_year = 1 Then
               ReportToday = 1
            End If
         ElseIf ReportingFreq.ToLower = "never" Then
            ReportToday = 0      
         Else
            Throw New Exception("Invalid reporting frequency")
         End If
      End If

      If (Today = ReportStart) Or (ReportYesterday = 1) Then 
         ZeroAverages()
         ReportYesterday = 0
      End If

      If (ResetCum.ToLower = "yes") Then
         If (Today.Month = AccumStart.Month) And (Today.Day = AccumStart.Day) Then
            ZeroAccums()
         End If
      End If

      
      If simulation_days = 0 Then

         DoDepthArrays()  ' if this is the first day of the simulation then need ot do the depth aggregation first.  Other days is left over from previous post
         console.writeline("Initialised the deltas")
      End If

      For OutLayer As Integer = 0 To NumDepths - 1 
         ini_biom_n_l(OutLayer) = biom_n_l(OutLayer)
         ini_fom_n_l(OutLayer) = fom_n_l(OutLayer)
         ini_hum_n_l(OutLayer) = hum_n_l(OutLayer)
         ini_org_n_l(OutLayer) = org_n_l(OutLayer)
         ini_min_n_l(OutLayer) = min_n_l(OutLayer) 
      Next
      
      
   End Sub

   <EventHandler()> Public Sub OnPost() 
      
      If Today >= ReportStart Then
         
         DoDepthArrays()
         DoDeltas()
         DoAverages()                        ' sum the Sum outputs
         DoAccums()                      ' accum the Cum outputs
                 
         If ReportToday = 1 Then         ' publish the report as needed and set reporting flags

            AverageAverages()
 
            MyOutput.Publish("do_output")
            ReportYesterday = 1
         End If
         
      End If

   End Sub
   
   
   Public Sub ZeroAverages()

      DaysInAve = 0
      
   End Sub
   
   Public Sub ZeroAccums()
      
      DaysInCum = 0
      
      CumPrecip = 0.0
      CumDrain = 0.0
      
      cumHarvestWt = 0.0
      cumHarvestN = 0.0

      cumleach_no3 = 0.0
      leach_nh4 = 0.0

      cum_dnit = 0.0
      cum_n2o_atm = 0.0


   End Sub
   
   
   Public Sub DoDepthArrays()
      
      For OutLayer As Integer = 0 To NumDepths - 1
         Satdep(OutLayer) = 0.0
         Duldep(OutLayer) = 0.0
         ll15dep(OutLayer) = 0.0
         SWdep(OutLayer) = 0.0
         Dul_l(OutLayer) = 0.0
         ll15_l(OutLayer) = 0.0
         SW_l(OutLayer) = 0.0
         urea_l(OutLayer) = 0.0
         nh4_l(OutLayer) = 0.0
         no3_l(OutLayer) = 0.0
         'SoilpH_l(OutLayer) = 0.0
         biom_n_l(OutLayer) = 0.0
         fom_n_l(OutLayer) = 0.0
         hum_n_l(OutLayer) = 0.0

         For SimLayer As Integer = 0 To dlayer.length - 1

            ll15dep(OutLayer) += WeightsArray(SimLayer, OutLayer) * ll15_dep(SimLayer)
            Duldep(OutLayer) += WeightsArray(SimLayer, OutLayer) * dul_dep(SimLayer)
            Satdep(OutLayer) += WeightsArray(SimLayer, OutLayer) * sat_dep(SimLayer)
            SWdep(OutLayer) += WeightsArray(SimLayer, OutLayer) * sw_dep(SimLayer)
            urea_l(OutLayer) += WeightsArray(SimLayer, OutLayer) * urea(SimLayer)
            nh4_l(OutLayer) += WeightsArray(SimLayer, OutLayer) * nh4(SimLayer)
            no3_l(OutLayer) += WeightsArray(SimLayer, OutLayer) * no3(SimLayer)
            'SoilpH_l(OutLayer) += WeightsArray(SimLayer, OutLayer) * SoilpH(SimLayer) / dlayer(SimLayer)
            biom_n_l(OutLayer) += WeightsArray(SimLayer, OutLayer) * biom_n(SimLayer)
            fom_n_l(OutLayer) += WeightsArray(SimLayer, OutLayer) * fom_n(SimLayer)
            hum_n_l(OutLayer) += WeightsArray(SimLayer, OutLayer) * hum_n(SimLayer)

         Next  'SimLayer
         
         'SoilpH_l(OutLayer) = SoilpH_l(OutLayer) / (OutEndDepth(OutLayer) - OutStartDepth(OutLayer))

         ll15_l(OutLayer) = ll15dep(OutLayer) / (OutEndDepth(OutLayer) - OutStartDepth(OutLayer))
         Dul_l(OutLayer) = Duldep(OutLayer) / (OutEndDepth(OutLayer) - OutStartDepth(OutLayer))
         SW_l(OutLayer) = SWdep(OutLayer) / (OutEndDepth(OutLayer) - OutStartDepth(OutLayer))

         org_n_l(OutLayer) = biom_n_l(OutLayer) + fom_n_l(OutLayer) + hum_n_l(OutLayer)
         min_n_l(OutLayer) = urea_l(OutLayer) + nh4_l(OutLayer) + no3_l(OutLayer)
         
      Next     'OutLayer
      
      
   End Sub
   
   Public Sub DoDeltas()
      
      For OutLayer As Integer = 0 To NumDepths - 1 
         dlt_biom_n_l(OutLayer) = biom_n_l(OutLayer) - ini_biom_n_l(OutLayer) 
         dlt_fom_n_l(OutLayer) = fom_n_l(OutLayer) - ini_fom_n_l(OutLayer) 
         dlt_hum_n_l(OutLayer) = hum_n_l(OutLayer) - ini_hum_n_l(OutLayer) 
         dlt_org_n_l(OutLayer) = org_n_l(OutLayer) - ini_org_n_l(OutLayer) 
         dlt_min_n_l(OutLayer) = min_n_l(OutLayer) - ini_min_n_l(OutLayer) 
      Next


   End Sub
   
   Public Sub DoAverages()
      
      DaysInAve += 1

   End Sub
   
   Public Sub DoAccums()
      
      DaysInCum += 1
      
      CumPrecip += rain + Irrigation
      CumDrain += drain
      
      cumHarvestWt = cumHarvestWt + HarvestedWt
      cumHarvestN = cumHarvestN + HarvestedN
      HarvestedWt = 0.0
      HarvestedN = 0.0
      
      cumleach_no3 += leach_no3
      cumleach_nh4 += leach_nh4

    
      For SimLayer As Integer = 0 To dlayer.length - 1
         cum_dnit += dnit(SimLayer)
         cum_n2o_atm += n2o_atm(SimLayer)
      Next  'SimLayer 
      
   End Sub
   
   
   Public Sub AverageAverages()

      
   End Sub



   
End Class
```
        manager Seepage
          on start_of_day:
```
if day = 349 then
   ! set seepage when bottom boundary is saturated
   bbc_seepage_potential = 0
endif
```
        operations Cutting
          21-dec-2010  agpasture graze type = residue, amount = 1600.00 (kg/ha)  (end_of_day)
          06-jan-2011  agpasture graze type = residue, amount = 1600.00 (kg/ha)  (end_of_day)
          20-feb-2011  agpasture graze type = residue, amount = 1600.00 (kg/ha)  (end_of_day)
          23-mar-2011  agpasture graze type = residue, amount = 1600.00 (kg/ha)  (end_of_day)
          29-apr-2011  agpasture graze type = residue, amount = 1600.00 (kg/ha)  (end_of_day)
          11-apr-2011  agpasture graze type = residue, amount = 1600.00 (kg/ha)  (end_of_day)
          31-may-2011  agpasture graze type = residue, amount = 1600.00 (kg/ha)  (end_of_day)
          27-jun-2011  agpasture graze type = residue, amount = 1600.00 (kg/ha)  (end_of_day)
          28-jul-2011  agpasture graze type = residue, amount = 1600.00 (kg/ha)  (end_of_day)
          6-sep-2011  agpasture graze type = residue, amount = 1600.00 (kg/ha)  (end_of_day)
          28-sep-2011  agpasture graze type = residue, amount = 1600.00 (kg/ha)  (end_of_day)
          16-oct-2011  agpasture graze type = residue, amount = 1600.00 (kg/ha)  (end_of_day)
          3-nov-2011  agpasture graze type = residue, amount = 1600.00 (kg/ha)  (end_of_day)
          17-nov-2011  agpasture graze type = residue, amount = 1600.00 (kg/ha)  (end_of_day)
          5-dec-2011  agpasture graze type = residue, amount = 1600.00 (kg/ha)  (end_of_day)
          19-dec-2011  agpasture graze type = residue, amount = 1600.00 (kg/ha)  (end_of_day)
          12-jan-2012  agpasture graze type = residue, amount = 1600.00 (kg/ha)  (end_of_day)
          7-feb-2012  agpasture graze type = residue, amount = 1600.00 (kg/ha)  (end_of_day)
          13-mar-2012  agpasture graze type = residue, amount = 1600.00 (kg/ha)  (end_of_day)
          13-apr-2012  agpasture graze type = residue, amount = 1600.00 (kg/ha)  (end_of_day)
          17-may-2012  agpasture graze type = residue, amount = 1600.00 (kg/ha)  (end_of_day)
          02-jul-2012  agpasture graze type = residue, amount = 1600.00 (kg/ha)  (end_of_day)
          24-aug-2012  agpasture graze type = residue, amount = 1600.00 (kg/ha)  (end_of_day)
        operations NonTrt_Fert
          21-dec-2010  fertiliser apply amount = 10, depth = 1 (mm), type = urea_n
          21-dec-2010  fertiliser apply amount = 10, depth = 10 (mm), type = urea_n
          21-dec-2010  fertiliser apply amount = 5, depth = 20 (mm), type = urea_n
              (end_of_day)
              (end_of_day)
              (end_of_day)
        operations Irrig
          27-dec-2010  irrigation apply amount = 5.3
          31-dec-2010  irrigation apply amount = 5.3
          03-jan-2011  irrigation apply amount = 5.3
          05-jan-2011  irrigation apply amount = 5.3
          07-jan-2011  irrigation apply amount = 5.3
          11-jan-2011  irrigation apply amount = 5.3
          12-jan-2011  irrigation apply amount = 95.4
          13-jan-2011  irrigation apply amount = 53.0
          14-jan-2011  irrigation apply amount = 106.0
          17-jan-2011  irrigation apply amount = 79.5
          18-jan-2011  irrigation apply amount = 106.0
          19-jan-2011  irrigation apply amount = 106.0
          20-jan-2011  irrigation apply amount = 106.0
          25-jan-2011  irrigation apply amount = 79.5
          26-jan-2011  irrigation apply amount = 53
          21-feb-2011  irrigation apply amount = 10
          28-mar-2011  irrigation apply amount = 10
          04-may-2011  irrigation apply amount = 10
          31-may-2011  irrigation apply amount = 10
          31-aug-2011  irrigation apply amount = 10
          29-sep-2011  irrigation apply amount = 10
          07-nov-2011  irrigation apply amount = 10
          05-dec-2011  irrigation apply amount = 10
          28-feb-2012  irrigation apply amount = 10
          30-mar-2012  irrigation apply amount = 10
          30-apr-2012  irrigation apply amount = 10
          31-may-2012  irrigation apply amount = 10
              (end_of_day)
              (end_of_day)
              (end_of_day)
      micromet
        soilalbedo = 0.23
        a_interception = 0
        b_interception = 0
        c_interception = 0
        d_interception = 0
      irrigation
        automatic_irrigation = off
        asw_depth = 600  # Depth to which ASW is calculated. (mm)
        crit_fr_asw = 0.5  # Fraction of ASW below which irrigation is applied (0-1.0)
        irrigation_efficiency = 1.0  # Efficiency of the irrigation. (0-1.0)
        irrigation_allocation = off  # Allocation limits
        allocation = 0  # Allocation in ML
        default_no3_conc = 0  # Nitrate concentration (ppm N)
        default_nh4_conc = 0  # Ammonium concentration (ppm N)
        default_cl_conc = 0  # Chloride concentration (ppm Cl)
        default_no3_conc = 0  # Nitrate concentration (ppm N)
        default_nh4_conc = 0  # Ammonium concentration (ppm N)
        default_cl_conc = 0  # Chloride concentration (ppm Cl)
      fertiliser
      surfaceom surface organic matter
        PoolName = grass  # Organic Matter pool name
        type = grass  # Organic Matter type
        mass = 20  # Initial surface residue (kg/ha)
        cnr = 17  # C:N ratio of initial residue
        standing_fraction = 0  # Fraction of residue standing
      AgPasture
        Nspecies = 2  # Number of species
        thisCropName = AgPasture  # Crop name shown as on the simulation tree
        cropName = ryegrass whiteclover  # Species names
        dmtotal = 1500      350  # Initial shoot dry matter (kg/ha)
        dmlitter = 250        50  # Initial litter dry matter (kg/ha)
        dmgreenmin = 500        50  # Minimum green dry matter (kg/ha)
        rootDepth = 600        250  # Root depth (mm)
        rlvp = 0.3 0.3  # Root distribution parameter ([0-1] relative to Root depth)
        WaterUptakeSource = apsim  # Water uptake done by AgPasture (calc) or by apsim?
      outputfile Sim: filename=T1_f0u0 Sim.out; title=T1_f0u0 Sim; events=Freq
        variables SimulationLabels
          variables: Treat, FertLevel, UrineLevel
        variables TimeStuff
          variables: dd/mm/yyyy as Date, year, month, simulation_days
        variables Data
          variable:
            rain
            Irrigation
            CumPrecip
            SWdep
            Satdep
            Duldep
            ll15dep
            CumDrain
            Dul_l as dul
            ll15_l as ll15
            sw_l as sw
            AboveGroundWt as Herbage
            AboveGroundLiveWt as Live
            AboveGroundDeadWt as Dead
            SpeciesLiveWt(1) as RyeGrass
            SpeciesLiveWt(2) as Clover
            cumHarvestWt
            HarvestWt
            cumHarvestN
            HarvestN
            urea_l as urea
            nh4_l as nh4
            no3_l as no3
            leach_urea
            leach_nh4
            leach_no3
            cumleach_no3
            cumleach_nh4
            dnit() as tot_denit format 3
            n2o_atm() as n2o_denit format3
            cum_dnit
            cum_n2o_atm
            SoilpH(1)
            min_n_l as min_n
            org_n_l as org_n
            biom_n_l as biom_n
            fom_n_l as fom_n
            hum_n_l as hum_n
            dlt_biom_n_l as dlt_biom_n
            dlt_fom_n_l as dlt_fom_n
            dlt_hum_n_l as dlt_hum_n
            dlt_org_n_l as dlt_org_n
            dlt_min_n_l as dlt_min_n
            emission_nh3() as Volat
            urea
            nh4
            n2o_atm() as AllN2O format 6
            n2o_atm_denitrification() as DenitN2O format 6
            n2o_atm_nitrification()  as NitrifN2O format 6
            n2o_atm as AllN2OByLayer format 6
            carbon_tot
            fom_c
            hum_c
            biom_c
  simulation T2_f0uA -> /simulations/T1_f0u0
    manager2 Trt
      Treat = 2  # Treatment number
      script: same as in T1_f0u0.Trt
    area paddock -> /simulations/T1_f0u0/paddock
      outputfile Sim -> /simulations/T1_f0u0/paddock/Sim: filename=T2_f0uA Sim.out; title=T2_f0uA Sim
        events Freq -> /simulations/T1_f0u0/paddock/Sim/Freq
        variables SimulationLabels -> /simulations/T1_f0u0/paddock/Sim/SimulationLabels
        variables TimeStuff -> /simulations/T1_f0u0/paddock/Sim/TimeStuff
        variables Data -> /simulations/T1_f0u0/paddock/Sim/Data
  simulation T3_f0uS -> /simulations/T1_f0u0
    manager2 Trt
      Treat = 3  # Treatment number
      script: same as in T1_f0u0.Trt
    area paddock -> /simulations/T1_f0u0/paddock
      outputfile Sim -> /simulations/T1_f0u0/paddock/Sim: filename=T3_f0uS Sim.out; title=T3_f0uS Sim
        events Freq -> /simulations/T1_f0u0/paddock/Sim/Freq
        variables SimulationLabels -> /simulations/T1_f0u0/paddock/Sim/SimulationLabels
        variables TimeStuff -> /simulations/T1_f0u0/paddock/Sim/TimeStuff
        variables Data -> /simulations/T1_f0u0/paddock/Sim/Data
  simulation T4_f2u0 -> /simulations/T1_f0u0
    manager2 Trt
      Treat = 4  # Treatment number
      script: same as in T1_f0u0.Trt
    area paddock -> /simulations/T1_f0u0/paddock
      outputfile Sim -> /simulations/T1_f0u0/paddock/Sim: filename=T4_f2u0 Sim.out; title=T4_f2u0 Sim
        events Freq -> /simulations/T1_f0u0/paddock/Sim/Freq
        variables SimulationLabels -> /simulations/T1_f0u0/paddock/Sim/SimulationLabels
        variables TimeStuff -> /simulations/T1_f0u0/paddock/Sim/TimeStuff
        variables Data -> /simulations/T1_f0u0/paddock/Sim/Data
  simulation T5_f2uA -> /simulations/T1_f0u0
    manager2 Trt
      Treat = 5  # Treatment number
      script: same as in T1_f0u0.Trt
    area paddock -> /simulations/T1_f0u0/paddock
      outputfile Sim -> /simulations/T1_f0u0/paddock/Sim: filename=T5_f2uA Sim.out; title=T5_f2uA Sim
        events Freq -> /simulations/T1_f0u0/paddock/Sim/Freq
        variables SimulationLabels -> /simulations/T1_f0u0/paddock/Sim/SimulationLabels
        variables TimeStuff -> /simulations/T1_f0u0/paddock/Sim/TimeStuff
        variables Data -> /simulations/T1_f0u0/paddock/Sim/Data
  simulation T6_f2uS -> /simulations/T1_f0u0
    manager2 Trt
      Treat = 6  # Treatment number
      script: same as in T1_f0u0.Trt
    area paddock -> /simulations/T1_f0u0/paddock
      outputfile Sim -> /simulations/T1_f0u0/paddock/Sim: filename=T6_f2uS Sim.out; title=T6_f2uS Sim
        events Freq -> /simulations/T1_f0u0/paddock/Sim/Freq
        variables SimulationLabels -> /simulations/T1_f0u0/paddock/Sim/SimulationLabels
        variables TimeStuff -> /simulations/T1_f0u0/paddock/Sim/TimeStuff
        variables Data -> /simulations/T1_f0u0/paddock/Sim/Data
  simulation T7_f4u0 -> /simulations/T1_f0u0
    manager2 Trt
      Treat = 7  # Treatment number
      script: same as in T1_f0u0.Trt
    area paddock -> /simulations/T1_f0u0/paddock
      outputfile Sim -> /simulations/T1_f0u0/paddock/Sim: filename=T7_f4u0 Sim.out; title=T7_f4u0 Sim
        events Freq -> /simulations/T1_f0u0/paddock/Sim/Freq
        variables SimulationLabels -> /simulations/T1_f0u0/paddock/Sim/SimulationLabels
        variables TimeStuff -> /simulations/T1_f0u0/paddock/Sim/TimeStuff
        variables Data -> /simulations/T1_f0u0/paddock/Sim/Data
  simulation T8_f4uA -> /simulations/T1_f0u0
    manager2 Trt
      Treat = 8  # Treatment number
      script: same as in T1_f0u0.Trt
    area paddock -> /simulations/T1_f0u0/paddock
      outputfile Sim -> /simulations/T1_f0u0/paddock/Sim: filename=T8_f4uA Sim.out; title=T8_f4uA Sim
        events Freq -> /simulations/T1_f0u0/paddock/Sim/Freq
        variables SimulationLabels -> /simulations/T1_f0u0/paddock/Sim/SimulationLabels
        variables TimeStuff -> /simulations/T1_f0u0/paddock/Sim/TimeStuff
        variables Data -> /simulations/T1_f0u0/paddock/Sim/Data
  simulation T9_f4uS -> /simulations/T1_f0u0
    manager2 Trt
      Treat = 9  # Treatment number
      script: same as in T1_f0u0.Trt
    area paddock -> /simulations/T1_f0u0/paddock
      outputfile Sim -> /simulations/T1_f0u0/paddock/Sim: filename=T9_f4uS Sim.out; title=T9_f4uS Sim
        events Freq -> /simulations/T1_f0u0/paddock/Sim/Freq
        variables SimulationLabels -> /simulations/T1_f0u0/paddock/Sim/SimulationLabels
        variables TimeStuff -> /simulations/T1_f0u0/paddock/Sim/TimeStuff
        variables Data -> /simulations/T1_f0u0/paddock/Sim/Data
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