Simulations: Version=148
  DataStore
    ExcelInput Observed: FileNames=[Observed.xlsx]
      SheetNames=[ObservedDrainage, ObservedN2O, ObservedHerbage, ObservedDailyN2O]
  Experiment
    Memo
      [Fert].Script.FertLevel = 0, 2, 4 !!
      [Exp1_Urine].Script.UrineLevel = None,Spring,Autumn
    Factors FactorsSingle
      Permutation
        Factor Fert: Specification=[Fert].Script.FertLevel = 4
        Factor Urine: Specification=[Exp1_Urine].Script.UrineLevel = None
    Factors FactorsFull (disabled)
      Permutation
        Factor Fert: Specification=[Fert].Script.FertLevel = 0,2,4
        Factor Urine: Specification=[Exp1_Urine].Script.UrineLevel = None,Spring,Autumn
    Simulation Base
      Memo
        19 July - VOS - started drafting the output component.  Done most of them - 'organic' variables left.  Deleted the multiple treatments - easier to put them back in later as links.  Committed (Rev 1672)
        20 July - VOS - finished all the organic variables.  Assumes daily output.  Structure a bit messey but can be tidied later. (Rev 1673)
        21 July - VOS - altered SWIM2, SoilN, SoilTemp, AgPasture to deal with 700 mm deep simulation with a seepage boundary condition (Rev 1674)
        21 July - VOS - updated to latest AgPasture component APSIM rev 1765
        27 July - LEB - updated met-file to 20/7/2011
        18 Aug - VOS - updated to new directory structure
        24 Aug - LEB - Fixed errors in several sets of the observed data.
        24Aug - VOS - changed the output file names so can more easily see the treatments simulated
        24Aug - VOS - changed Exp1Report to do accumualtions of HarvestWt, HarvestN, leach_no3, leach_nh4, and denitrifictions; added ability to not report until the experiment starts
        13Sep - LEB - Updated observed and met files as well as APSIM file
        4Nov11 - LEB Updated observed, met and APSIM file.
        23Nov11 - LEB Updated manager folder info

        13Feb12 - VOS - Converted all the Managers to work with APSIM 7.4 and notified Laura about error with the day in the met file - 7.4

        1-2 Aug 12 - VOS - Fixed error where the reporting had lost the varaibles to report.  Removed the 'speculative' nitrate adsorbtion - reconsider once the lab data have been analysed.
        - nitrate leaching low cf data
        - missing N harvest data
        - N2O VERY high -need ot look in more detail about sources etc
        - Wrong date in one of the DM harvest observeds
        - Really need to construct a mass balance report

        21 November 2012 LEB
        Created graph reports for each treatment.  Solid lines represent simulated data, the dots represent measured data.
        25 Nov 2012:  Phone meeting with Val togo through the measured data vs the simulated data.  Commited this APSIM file as the pure one to go back to if problems arise later.

        25 January 2013
        Val added NH3 Volat to the list of outputs

        Aug 2013:  Outputs for N2O and soil C by layer (detailed 14 layers) prevents the graphs from showing.
      Weather: FileName=Lysimeter Exp.met
      Clock: Start=2010-12-15; End=2012-08-27
      Summary
      Manager PatchRainfall
        date1 = 2011-01-01
        date2 = 2012-08-27
        patchFileName = NgahereManualRainfall.met
```csharp
using APSIM.Shared.Utilities;
using Models.PMF;
using Models.Core;
using Models.Interfaces;
using System;
using System.Linq;
using System.Data;
using System.IO;
using System.Collections.Generic;
using System.Diagnostics;
namespace Models
{
    [Serializable]
    [System.Xml.Serialization.XmlInclude(typeof(Model))]
    public class Script : Model
    {
        [Link] Clock clock;
        [Link] IWeather weather;
        [Link] Simulation simulation;
        
        private DataTable data;
        private List<DateTime> dates = new List<DateTime>();
        private DateTime startDate;
        private DateTime endDate;

        [Description("Name of file containing weather data to patch:")]
        public string patchFileName { get; set; }

        [Description("Date to start patching weather data (can be blank):")]
        public string date1 { get; set; }

        [Description("Date to stop patching weather data: (can be blank)")]
        public string date2 { get; set; }

		[EventSubscribe("StartOfSimulation")]
        private void OnStartOfSimulation(object sender, EventArgs e)
		{
			// Ensure filename is relative to the directory where the .apsimx file is located.
			string fullFileName = PathUtilities.GetAbsolutePath(patchFileName, simulation.FileName);
		
			// Read in data.
			data = ApsimTextFile.ToTable(fullFileName);
			foreach (DataRow row in data.Rows)
				dates.Add(DataTableUtilities.GetDateFromRow(row));
			
			// Ensure startDate and endDate always have a value.
			if (string.IsNullOrEmpty(date1))
				startDate = clock.StartDate;
			else
				startDate = DateTime.Parse(date1);

 			if (string.IsNullOrEmpty(date2))
				endDate = clock.EndDate;
			else
				endDate = DateTime.Parse(date2);

		}

        [EventSubscribe("PreparingNewWeatherData")]
        private void OnPreparingNewWeatherData(object sender, EventArgs e)
        {
			if (clock.Today >= startDate && clock.Today <= endDate)
			{
				// check to see if we have a row of data for today.
				int rowIndex = dates.IndexOf(clock.Today);
				if (rowIndex != -1)
				{
					// Yes we do have data for today so patch the data.
					foreach (DataColumn column in data.Columns)
					{
						if (column.ColumnName.Equals("Rain", StringComparison.InvariantCultureIgnoreCase))
							weather.Rain = Convert.ToDouble(data.Rows[rowIndex][column.ColumnName]);
						else if (column.ColumnName.Equals("MaxT", StringComparison.InvariantCultureIgnoreCase))
							weather.MaxT = Convert.ToDouble(data.Rows[rowIndex][column.ColumnName]);
						else if (column.ColumnName.Equals("MinT", StringComparison.InvariantCultureIgnoreCase))
							weather.MinT = Convert.ToDouble(data.Rows[rowIndex][column.ColumnName]);
						else if (column.ColumnName.Equals("Radn", StringComparison.InvariantCultureIgnoreCase))
							weather.Radn = Convert.ToDouble(data.Rows[rowIndex][column.ColumnName]);
						else if (column.ColumnName.Equals("CO2", StringComparison.InvariantCultureIgnoreCase))
							weather.CO2 = Convert.ToDouble(data.Rows[rowIndex][column.ColumnName]);
						else if (column.ColumnName.Equals("VP", StringComparison.InvariantCultureIgnoreCase))
							weather.VP = Convert.ToDouble(data.Rows[rowIndex][column.ColumnName]);
					}
				}
			}
        }
    }
}
```
      SoilArbitrator
      Forages
        Parameters:
          Name                          IsLive  DigestibilityString  FractionConsumable  MinimumAmount  UseDigestibilityFromModel
          SurfaceOrganicMatter.Residue  true    0                    0                   0              false
          SurfaceOrganicMatter.Residue  false   0                    0                   0              false
          AGPRyegrass.Leaf              true    0.7                  1                   100            false
          AGPRyegrass.Leaf              false   0.3                  1                   0              false
          AGPRyegrass.Stem              true    0.7                  1                   100            false
          AGPRyegrass.Stem              false   0.3                  1                   0              false
          AGPRyegrass.Stolon            true    0.7                  1                   100            false
          AGPRyegrass.Stolon            false   0.3                  1                   0              false
          AGPWhiteClover.Leaf           true    0.7                  1                   100            false
          AGPWhiteClover.Leaf           false   0.3                  1                   0              false
          AGPWhiteClover.Stem           true    0.7                  1                   100            false
          AGPWhiteClover.Stem           false   0.3                  1                   0              false
          AGPWhiteClover.Stolon         true    0.7                  1                   100            false
          AGPWhiteClover.Stolon         false   0.3                  1                   0              false
          AGPPaspalum.Leaf              true    0.7                  1                   100            false
          AGPPaspalum.Leaf              false   0.3                  1                   0              false
          AGPPaspalum.Stem              true    0.7                  1                   100            false
          AGPPaspalum.Stem              false   0.3                  1                   0              false
          AGPPaspalum.Stolon            true    0.7                  1                   100            false
          AGPPaspalum.Stolon            false   0.3                  1                   0              false
      MicroClimate: a_interception=0; b_interception=0; c_interception=0; d_interception=0; SoilHeatFluxFraction=0; MinimumHeightDiffForNewLayer=10000; NightInterceptionFraction=0; ReferenceHeight=2
      Zone Paddock: Area=1; Slope=0; AspectAngle=0; Altitude=50
        Manager SWIM3_SetLowerBC (disabled)
          LowerBCType = seepage
          LowerBCValue = -500
```csharp
using Models.Climate;
using APSIM.Shared.Utilities;
using Models.Soils.Nutrients;
using Models.Soils;
using Models.PMF;
using Models.Core;
using System.Xml.Serialization;
using System;
using Models.AgPasture;
using Models.Interfaces;

namespace Models
{
    [Serializable] 
    [System.Xml.Serialization.XmlInclude(typeof(Model))]
    public class Script : Model
    {
        [Link] Clock clock;
        [Link] ISummary summary;
        [Link] private Swim3 swim;
        //[Link] private PastureSpecies ryegrass;
        //[Link] private SimpleGrazing grazing;
        
        public enum LowerBCTypeOptions {gradient,seepage,potential};

        [Separator("Sets the lower boundary condition type (and value if set to 'potential' for SWIM3. The change is applied at the beginning of the first day of the simulation.")]
        [Description("[Get a dropdown] What lower boundary condition is wanted?")] public LowerBCTypeOptions LowerBCType { get; set; }
        [Description("If 'potential', then what potential? Should be negative (mm) ")] public double LowerBCValue { get; set; }

        public double SoilWaterStart  { get; set; }
        public double SoilWaterEnd  { get; set; }

        [EventSubscribe("DoDailyInitialisation")]
        private void DoDailyInitialisation(object sender, EventArgs e)
        {
        }

        [EventSubscribe("DoReportCalculations")]
        private void DoReportCalculations(object sender, EventArgs e)
        {
        }

        [EventSubscribe("DoManagement")]
        private void DoDailyCalculations(object sender, EventArgs e)
        {
            if (clock.Today == clock.StartDate)
            {
                summary.WriteMessage(this, "Script is setting lower boundary condition to " + LowerBCType, MessageType.Diagnostic);
                if (LowerBCType == LowerBCTypeOptions.gradient)
                    swim.SetLowerBCForGradient(bbcGradient: 0.0);   // in cm/cm (ibbc=0) Note that this is the default setting
                else if (LowerBCType == LowerBCTypeOptions.potential)
                    swim.SetLowerBCForGivenPotential(bbcPotential: LowerBCValue /10.0 );    //  convert to cm (ibbc=1), DUL is -100 cm so values more positive will often result in inflow to the bottom of the soil profile. Input in mm so divide here.
                else if (LowerBCType == LowerBCTypeOptions.seepage)
                    swim.SetLowerBCForSeepage(bbcPotentialSeepage: 0.0);  // in cm (ibbc=3). This is for zero-tension lysimeters
                else
                	throw new Exception("Wrong lower boundary condition type");
            }
        }
    }
}
```
        Manager nh3_volatilisation (disabled)
          Depth_for_NH3 = 50
          Soil_pH_base = 5.7 5.7 5.7 5.3 5.3 5.9 5.9 5.9 6.6 6.6 6.7 6.7 6.7 6.7
          CEC_strng = 28.2 28.2 28.2 21 21 17.3 17.3 17.3 12 12 12.9 12.9 12.9 12.9
          k_BC = 0.03
          k_pH_hyd = 1
          k_pH_nit = 1
          k_pH_x = 0.2
          k_AFPV = 300
          f_NV_strng = 1 1 1 0.3 0
          f_AV = 0.5
          CritRain1 = 3
```csharp
using Models.Climate;
using APSIM.Shared.Utilities;
using Models.Soils.Nutrients;
using Models.Soils;
using Models.Soils.SoilTemp;
using Models.PMF;
using Models.Core;
using System.Xml.Serialization;
using System;
using Models.AgPasture;
using Models.Interfaces;
using System.Diagnostics;

// This module estimate the amount of NH3 in the soil and its volatilisation

// -->  Last uptaded in: 12/Jul/2011 ..................


namespace Models
{
    [Serializable] 
    [System.Xml.Serialization.XmlInclude(typeof(Model))]
    public class Script : Model
    {
		[Link]
		private IWeather weather;
		
		[Link]
		private ISoilWater waterBalance;
		 
		[Link]
		private Irrigation irrigation;

		[Link]
		private Nutrient nutrient;

		[Link]
		private Swim3 swim;

		[Link]
		private NFlow hydrolysis;

		[Link]
		private NFlow nitrification;		

		[Link]
		private ISolute nh4;
				
		[Link]
		private Physical physical;

		[Link]
		private Chemical chemical;

		[Link(IsOptional=true)]
		private SoilTemperature soilTemperature;
		
		[Link(IsOptional=true)]
		private CERESSoilTemperature ceresSoilTemperature;
		
	    // Parameter variables:
	    [Separator("NH3 volatilisation parameters")]
    	[Description("Depth to which NH3 volatilisation is considered (mm):")]
    	public double Depth_for_NH3 { get; set; }
    
    	[Separator("Base soil and pH change parameters")]            
    	[Description("The base soil pH for each soil layer:")]
    	public string Soil_pH_base { get; set; }             // The base soil pH, apsim will try to keep to this value, same for all layers
    	[Description("The CEC for each layer (meq/100g)")] 
    	public string CEC_strng { get; set; }           // The CEC for each layer (meq/100g)
    	[Description("Soil buffer capacity factor")] 
    	public double k_BC { get; set; }                    // Soil buffer capacity factor ()
    	[Description("Factor to convert urea hydrolysed into H+ changes")] 
    	public double k_pH_hyd { get; set; }                 // Factor to convert urea hydrolysed into H+ changes ()
    	[Description("Factor to convert NH4 nitrified into H+ changes")] 
    	public double k_pH_nit { get; set; }                 // Factor to convert NH4 nitrified into H+ changes ()
    	[Description("Minimum decrease for pH (fraction/day)")] 
    	public double k_pH_x { get; set; }                   // Minimum decrease for pH (fraction/day)
    	
    	[Separator("Gas exchange parameters")]
    	[Description("Factor for soil/atmosphere gas exchange (AFPV/mm):")] 
    	public double k_AFPV { get; set; }                   // Factor to transform potential evaporation in air filled pore volumes that are potential exchanged with to atmosphere
    	[Description("Fractor for volatilisable NH3, per soil layer (0-1):")] 
    	public string f_NV_strng { get; set; }               // The fraction of potential NH3 volatilisation for each layer that is transpoted to the soil surface ()

		[Separator("Additional limits for volatilisation")]
    	[Description("Fraction of total soil NH4 that can be volatilised per day:")] 
    	public double f_AV { get; set; }                     // Fraction of total soil NH4 that can be volatilised per day, limits volatilisation and ensure mass balance ()
    	[Description("Rain+irrigation below which volatilisation is not limited (mm):")] 
    	public double CritRain1 { get; set; }                // Critial rainfall. Below this volatilisation is not limited by rainfall or irrigation
    	[Description("Rain+irrigation above which no volatilisation occur (mm):")] 
    	private double CritRain2 { get; set; }                // Critial rainfall. Above this no volatilisation occurs
		
    	// Output variables
	    [Units("ppm")]
	    public double[] nh3ppm { get; set; }  // The estimated amount of NH3 in the soil (ppm)

	    [Units("kgN/ha")]
	    public double[] nh3 { get; set; }               // The estimated amount of NH3 in the soil (kg/ha)
	    
	    [Units("g/ha")]
	    public double[] nh3_gas { get; set; }             // The estimated amount of NH3 in the soil in gaseous form (g/ha)
    
    	[Units("kgN/ha")]
	    public double[] emission_nh3 { get; set; }      // The estimated amount of NH3 volatilised (kg/ha/day)
    
    	[Units("")]
	    public double[] SoilpH { get; set; }                 // dummy soil pH
    
    	[Units("kgN/ha")]
	    public double[] nh4_sol { get; set; }           // The amount of NH4 in the soil solution (kg/ha)   
    
    	[Units("oC")]
	    public double[] SoilTemp { get; set; }              // The soil temperature (oC)

    	[Units("AFPV/day")]
	    public double PotGasExchangeNH { get; set; }  // The potential soil-atmosphere gas exchange (Air-filled-pore-spaces/day)
    
        [Units("L/m2/day")]
    	public double[] GasExchangeNH { get; set; }   // The volume of gas exchanged (L/m2/day)
    	
    	[Units("L/m2")]
	    public double[] AirFilledPoreVolume { get; set; } // The volume of air filled pore space in each soil layer (L_air/m2)
    
    	[Units("")]
	    public double[] NH3toNHx_ratio { get; set; }          // The ratio between NH3 and NHx in the soil solution
    
    	[Units("x1000")]
	    public double[] NH3GtoNH3A_ratio { get; set; }   // The ratio between NH3 liquide and gas in the soil, times 1000
    
	    [Units("")]
	    public double[] pK_NHx { get; set; }                  // The equilibrium constant for NH4-NH3
    	
    	[Units("")]
    	public double[] pG_NH3 { get; set; }                  // The equilibrium constant for NH3A-NH3G

    	// Internal variables
    	private int NH3_z;                           // The layer to consider NH3 volatilization
    	private double[] f_NV;                           // The fraction of NH3 transport from each layer
    	private double[] Ini_SoilpH;                     // The initial, or base, soil pH
    	private double[] SoilCEC;                        // The CEC (mol/kg)

    	[EventSubscribe("StartOfSimulation")]
        private void OnStartOfSimulation(object sender, EventArgs e)
    	{
    	//Debugger.Break();
        	SoilpH = new double[waterBalance.Thickness.Length];
        	Ini_SoilpH = new double[waterBalance.Thickness.Length];

        	// Split the read values of f_NV into an array
        	f_NV = makeArray(f_NV_strng);
        	// Split the read values of pH into an array
        	Ini_SoilpH = makeArray(Soil_pH_base);
        	// Split the read values of CEC into an array
        	SoilCEC = makeArray(CEC_strng);
        	var oldIni_SoilpH = Ini_SoilpH;
        	Ini_SoilpH = new double[waterBalance.Thickness.Length];
        	if (oldIni_SoilpH != null)
	            Array.Copy(oldIni_SoilpH, Ini_SoilpH, Math.Min(waterBalance.Thickness.Length, oldIni_SoilpH.Length));
        	var oldSoilCEC = SoilCEC;
        	SoilCEC = new double[waterBalance.Thickness.Length];
        	if (oldSoilCEC != null)
	            Array.Copy(oldSoilCEC, SoilCEC, Math.Min(waterBalance.Thickness.Length, oldSoilCEC.Length));
        	// Assign initial pH values and convert CEC from meq to mol
        	for (int z = 0; z < waterBalance.Thickness.Length; z++)
        	{
	            Ini_SoilpH[z] = Math.Max(0, Ini_SoilpH[z]);
            	SoilpH[z] = Ini_SoilpH[z];
            	SoilCEC[z] = 0.01 * Math.Max(0.1, SoilCEC[z]);     // mol/kg
        	}
	
        	// Identify the layer down to which volatilization is considered
        	double Depth_from_surface = 0;
        	for (int z = 0; z < waterBalance.Thickness.Length; z++)
        	{
	            Depth_from_surface = Depth_from_surface + waterBalance.Thickness[z];
            	if (Depth_from_surface <= Depth_for_NH3)
	                NH3_z = z;
            	else
	                z = waterBalance.Thickness.Length;
        	}

	        // verify the bounds of the pH converting factor
        	k_pH_hyd = Math.Min(1, Math.Max(0, k_pH_hyd));
        	k_pH_nit = Math.Min(1, Math.Max(0, k_pH_nit));
        	k_pH_x = Math.Min(1, Math.Max(0, k_pH_x));
        	k_BC = Math.Max(0, k_BC);
        	var oldF_NV = f_NV;
        	f_NV = new double[waterBalance.Thickness.Length];
        	if (oldF_NV != null)
	            Array.Copy(oldF_NV, f_NV, Math.Min(waterBalance.Thickness.Length, oldF_NV.Length));
        	for (int z = 0; z < waterBalance.Thickness.Length; z++)
	            f_NV[z] = Math.Min(1, Math.Max(0, f_NV[z]));
	
        	// ----------- NH3 volatilization ---------------------------------------------------
        	Console.WriteLine("");
        	Console.WriteLine("Volatilization will be calculated by manager");
        	Console.WriteLine("   Top " + Depth_for_NH3.ToString() + "mm are considered,");
        	Console.WriteLine("   pH variation is mimicked by dlt_urea_hydrol + dlt_nh4_nitrif");
        	Console.WriteLine("");
    	}

        [EventSubscribe("DoManagementCalculations")]
        private void DoManagementCalculations(object sender, EventArgs e)
        {
            double urea_hydrol;                    // The amount of urea hydrolised (mol/L)
            double nh4_nitrif;                     // The amount of NH4 nitrified (mol/L)
            double dlt_H;                          // Estimated variation of H+ in the soil (mol/L)
            double delta_pH_Hyd = 0;               // Variation in soil pH due to urea hydrolysis
            double delta_pH_Nit = 0;               // Variation in soil pH due to NH4 nitrification
            double delta_pH_x = 0;                 // Minimum decrease in soil pH, to ensure pH returns to base after urea deposition
            double delta_pH_vol = 0;               // Variatin in pH due to volatilisation
            double Beta = 1;                       // The soil buffer capacity ()
            double[] delta_nh4 = new double[waterBalance.Thickness.Length];   // The variation in NH4 content due to volatilisation (kg/ha)
            double RainFactor = 1.0;               // The rain factor
    
            if (ceresSoilTemperature == null)  // to get the soil temperature from SoilTemp, otherwise use SoilN's:
                SoilTemp = soilTemperature.AverageSoilTemp;
            else
                SoilTemp = ceresSoilTemperature.Value;
    
            nh3ppm = new double[waterBalance.Thickness.Length];
            nh4_sol = new double[waterBalance.Thickness.Length];
            nh3 = new double[waterBalance.Thickness.Length];
            nh3_gas = new double[waterBalance.Thickness.Length];
            emission_nh3 = new double[waterBalance.Thickness.Length];
            GasExchangeNH = new double[waterBalance.Thickness.Length];
            AirFilledPoreVolume = new double[waterBalance.Thickness.Length];
            NH3toNHx_ratio = new double[waterBalance.Thickness.Length];
            NH3GtoNH3A_ratio = new double[waterBalance.Thickness.Length];
            pK_NHx = new double[waterBalance.Thickness.Length];
            pG_NH3 = new double[waterBalance.Thickness.Length];
    
            // Calc the irrigation factor
            if (weather.Rain + irrigation.IrrigationApplied < CritRain1)
                RainFactor = 1.0;
            else if (weather.Rain + irrigation.IrrigationApplied > CritRain2)
                RainFactor = 0.0;
            else
                RainFactor = (weather.Rain + irrigation.IrrigationApplied - CritRain1) / (double)(CritRain2 - CritRain1);
    
            // +++++++++++++++++++++++++++++++++++++++++++++++++++++++++++++++++++++++++++++++++++++++++++++++++++++++++++++++++++++++++++
            // NOTES:
            // The RainFactor accounts for the downwards transport of NH3 gas when water from rain or irrigation is being drained throught the soil.
            // Below RainCrit1, precipitation has no effect, above RainCrit2 volatilisation is zero.  A linear relationship is used between
            // these two limits:
            // 
            // |
            // F   1+                /-----------
            // R a    |               /:
            // a c    |              / :
            // i t    |             /  :
            // n o    |            /   :
            // r    |           /    :
            // |          /     :
            // |         /      :
            // 0+========+-------+--------------> Rain + Irrigation
            // |      Rain    Rain
            // Crit1   Crit2
            // +++++++++++++++++++++++++++++++++++++++++++++++++++++++++++++++++++++++++++++++++++++++++++++++++++++++++++++++++++++++++++
    
    		double[] dlt_urea_hydrol = hydrolysis.Value;
    		double[] dlt_rntrf = nitrification.Value;
    		double[] conc_water_nh4 = swim.ConcWaterNH4;
            for (int z = 0; z < waterBalance.Thickness.Length; z++)
            {
    
                // 0-Compute the value of Beta
                Beta = k_BC * physical.BD[z] * SoilCEC[z] / (double)waterBalance.SW[z];
    
                // 1-Compute the consumption of H+ by urea hydrolysis
                urea_hydrol = dlt_urea_hydrol[z] / (double)(waterBalance.Thickness[z] * 10000);   // kg_urea_N/L_soil
                urea_hydrol = urea_hydrol * 1000 / (double)waterBalance.SW[z];                 // g_urea_N/L_water
                urea_hydrol = urea_hydrol / 14.00674;                     // mol_urea_N/L_water  - All N pools as expresseed in kg_N, so molecular mass is 14
                dlt_H = -2 * urea_hydrol * k_pH_hyd;                      // mol/L
    
                // 2-Compute changes in soil pH due to urea hydrolysis
                if (dlt_H < 0)
                    delta_pH_Hyd = (14 / (1 + ((14 - SoilpH[z]) / (double)SoilpH[z]) * Math.Pow(10, (dlt_H / (double)Beta)))) - SoilpH[z];
                else
                    delta_pH_Hyd = 0;
                SoilpH[z] = SoilpH[z] + delta_pH_Hyd;
    
                // 3-Compute the production of H+ by nitrification and its effect on soil pH
                nh4_nitrif = dlt_rntrf[z] / (double)(waterBalance.Thickness[z] * 10000);          // kg_nh4_N/L_soil
                nh4_nitrif = nh4_nitrif * 1000 / (double)waterBalance.SW[z];                   // g_nh4_N/L_water
                nh4_nitrif = nh4_nitrif / 14.0067;                        // mol_nh4_N/L_water  - All N pools as expresseed in kg_N, so molecular mass is 14
                dlt_H = 2 * nh4_nitrif * k_pH_nit;                        // mol/L
                if (dlt_H > 0)
                    delta_pH_Nit = (14 / (1 + ((14 - SoilpH[z]) / (double)SoilpH[z]) * Math.Pow(10, (dlt_H / (double)Beta)))) - SoilpH[z];
                else
                    delta_pH_Nit = 0;
    
                // 4-Compute soil forced pH change - this is to ensure pH will decline to its base value
                if (SoilpH[z] > Ini_SoilpH[z])
                    delta_pH_x = -(SoilpH[z] - Ini_SoilpH[z]) * k_pH_x;
                else
                    delta_pH_x = 0;
                SoilpH[z] = SoilpH[z] + Math.Min(delta_pH_Nit, delta_pH_x);
    
                // 5-bound pH between base and 14
                SoilpH[z] = Math.Min(14, Math.Max(Ini_SoilpH[z], SoilpH[z]));
    
    
                // +++++++++++++++++++++++++++++++++++++++++++++++++++++++++++++++++++++++++++++++++++++++++++++++++++++++++++++++++++++++++++
                // NOTES:
                // The changes in pH are due to the consumption of H+ as urea is hydrolysed or the production of H+ by nitrification,
                // in theory for each mol of N hydrolised two mols of H+ are consumed, while two mols are produced by nitrification;
                // The k_pH_nit ad k_pH_hyd factors allow to control the extent that H+ is affected by hydrolysis and nitrification,
                // when set to zero there's no effect, while setting it to one causes full theoretical effect
                // The parameter Beta describes the soil buffer capacity, which is a function of CEC, k_BC is used for adjusting the relationship.
                // k_pH_x stablish a minimum rate for pH decay, it mimicks soil buffering and other reactions that bring pH down
                // after urea/urine deposition. Used when nitrification is not enough to bring the pH down.
                // +++++++++++++++++++++++++++++++++++++++++++++++++++++++++++++++++++++++++++++++++++++++++++++++++++++++++++++++++++++++++++
    
    
                // 6-compute the NH3 equilibrium factors
                pK_NHx[z] = pK("aq", SoilTemp[z] + 273.15);      // Aqueous equilibrium [NH4 <--> NH3]
                pG_NH3[z] = pK("gs", SoilTemp[z] + 273.15);      // Gaseous equilibrium [NH3_liquid <--> NH3_gas]
    
                // 7-Calc the proportion of total NHx that is in the form of NH3
                double NH3toNHx = 1 / (1 + Math.Pow(10, (pK_NHx[z] - SoilpH[z])));
                NH3toNHx_ratio[z] = NH3toNHx;
    
                // 8-Calc the amount of NH3 in aqueous solution (original equation uses mol/L, thus the ratio of molecular mass is needed)
                nh3ppm[z] = conc_water_nh4[z] * NH3toNHx * (17.03 / 18.04);      // ppm (ug/cm3_water)
    
                // 9-Calc the proportion of total NH3 that is in the gaseous form
                double NH3GtoNH3A = 1 / (1 + Math.Pow(10, (pG_NH3[z])));
                NH3GtoNH3A_ratio[z] = NH3GtoNH3A * 1000;
    
                // 10-Calc the amount of NH3 in gaseous form
                nh3_gas[z] = nh3ppm[z] * NH3GtoNH3A;                   // ppm (ug/cm3_air in soil = mg/L)
    
                // 11-Calc the amount of NH3 in gaseous form and the amount effectivelly lost by volatilization
                PotGasExchangeNH = waterBalance.Eo * k_AFPV;   // air filled pore volumes/day
                AirFilledPoreVolume[z] = (physical.SAT[z] - waterBalance.SW[z]) * waterBalance.Thickness[z];    // L_air/m2
                if (z <= NH3_z)
                {
                    GasExchangeNH[z] = PotGasExchangeNH * AirFilledPoreVolume[z];      // L_air/m2/day
                    GasExchangeNH[z] = GasExchangeNH[z] * RainFactor;
                    if (GasExchangeNH[z] > 0)
                    {
                        emission_nh3[z] = nh3_gas[z] * GasExchangeNH[z] * f_NV[z];      // mg/m2
                        emission_nh3[z] = emission_nh3[z] * 10E+4;                      // mg/ha
                        emission_nh3[z] = emission_nh3[z] * 10E-6;                      // kg/ha
                    }
                    else
                        emission_nh3[z] = 0;
                    // Limit volatilisation to a fraction of NH4 for each layer
                    emission_nh3[z] = Math.Min(emission_nh3[z], f_AV * nh4.ppm[z]);
                }
                else
                {
                    GasExchangeNH[z] = 0;
                    emission_nh3[z] = 0;
                }
    
    
                // +++++++++++++++++++++++++++++++++++++++++++++++++++++++++++++++++++++++++++++++++++++++++++++++++++++++++++++++++++++++++++
                // NOTES:
                // To estimate the amount of NH3 volatilised during the day, it is assumed that the amount of NH3 in gaseous form in the
                // beginning of the day represents well the proportion of NHx 'volatilisable'. It is assumed also that the potential evaporation
                // is a good estimator for the gas exchange between soil and atmosphere (this makes volatilisation sensible to temperature and
                // wind).  By scaling the gas exchange to the air filled pore space in the soil, we get volatilisation also sensible to water
                // content, which mimicks the decrease in gas transport when the soil is wet.  Finally a factor (f_NV) is used to limit the
                // contribution of each soil layer to the overall volatilisation (deep layers would volatilise less because NH3 needs to move
                // transport to the surface.
                // +++++++++++++++++++++++++++++++++++++++++++++++++++++++++++++++++++++++++++++++++++++++++++++++++++++++++++++++++++++++++++
    
    
                // 12-Compute soil pH change due to volatilisation
                double emission_nh3ised = emission_nh3[z] / (double)(waterBalance.Thickness[z] * 10000);  // kg_nh3_N/L_soil
                emission_nh3ised = emission_nh3ised * 1000 / (double)waterBalance.SW[z];                      // g_nh3_N/L_water
                emission_nh3ised = emission_nh3ised / 14.0067;                           // mol_nh3_N/L_water  - All N pools as expresseed in kg_N, so molecular mass is 14
                dlt_H = emission_nh3ised;                                                // mol/L
                if (dlt_H > 0)
                    delta_pH_vol = (14 / (1 + ((14 - SoilpH[z]) / (double)SoilpH[z]) * Math.Pow(10, (dlt_H / (double)Beta)))) - SoilpH[z];
                else
                    delta_pH_vol = 0;
    
                // 13- Calc new pH and bound it between base and 14
                SoilpH[z] = SoilpH[z] + delta_pH_vol;
                SoilpH[z] = Math.Min(14, Math.Max(Ini_SoilpH[z], SoilpH[z]));
    
                // 14-Transform variables to publishable units
                nh3[z] = nh3ppm[z] * waterBalance.SW[z] / (double)1000;                     // mg/cm3_soil = g/L_soil
                nh3[z] = nh3[z] * waterBalance.Thickness[z] * 10000;                   // g/ha_soil
                nh3[z] = nh3[z] / (double)1000;                                // kg/ha
    
                nh3_gas[z] = nh3_gas[z] * (physical.SAT[z] - waterBalance.SW[z]) / (double)1000;     // mg/cm3_soil = g/L_soil
                nh3_gas[z] = nh3_gas[z] * waterBalance.Thickness[z] * 10000;           // g/ha_soil
    
                nh4_sol[z] = conc_water_nh4[z] * waterBalance.SW[z] / (double)1000;         // mg/cm3_soil = g/L_soil
                nh4_sol[z] = nh4_sol[z] * waterBalance.Thickness[z] * 10000;           // g/ha_soil
                nh4_sol[z] = nh4_sol[z] / (double)1000;                        // kg/ha
    
                // Compute the delta in nh4 amount
                delta_nh4[z] = -emission_nh3[z];
            }
            
            nh4.AddKgHaDelta(SoluteSetterType.Other, delta_nh4);
   
        }



    	public double[] makeArray(string ArrayString)
    	{

	        // Get the string with values from the user interface and put the values in an numeric array

        	string[] MyArray_string;
        	double[] MyArray_single;
        	char[] Separator = " ".ToCharArray();

        	// 1-Split string into array
        	MyArray_string = ArrayString.Split(Separator, StringSplitOptions.RemoveEmptyEntries);

        	// 2-convert array into type single
        	MyArray_single = new double[MyArray_string.Length - 1 + 1];
        	for (int i = 0; i <= MyArray_single.Length - 1; i++)
	            MyArray_single[i] = Convert.ToDouble(MyArray_string[i]);
        	return MyArray_single;
    	}

	    public double pK(string n_species, double Temp)
    	{

	        // Calculates the equilibrium constants, 
        	// if 'aq' then nh4-nh3 equilibrium in water
        	// if 'gs' then gas-liquid equilibrium for nh3

	        double[] a_pK = new[] { 0.09018, -1.69 };
        	double[] b_pK = new[] { 2729.92, 1477.7 };
        	int sp = 0;

        	if (n_species == "aq")
	            sp = 0;
        	else if (n_species == "gs")
            	sp = 1;
        	return a_pK[sp] + b_pK[sp] / Temp;
    	}
    
	}
}
```
        Manager Exp1_Urine
          AutumnUrinePatch_date_str = 2011-05-04
          SpringUrinePatch_date_str = 2011-08-31
          Urine_Water_to_add = 10
          Urine_N_to_add = 800
          Br_to_add = 0
          Depth_for_urine = 150
          UrineLevel = None
```csharp
using Models.Climate;
using APSIM.Shared.Utilities;
using Models.Soils.Nutrients;
using Models.Soils;
using Models.PMF;
using Models.Core;
using System.Xml.Serialization;
using System;
using Models.AgPasture;
using Models.Interfaces;
using System.Diagnostics;

namespace Models
{
    [Serializable] 
    [System.Xml.Serialization.XmlInclude(typeof(Model))]
    public class Script : Model
    {
    
    	//<Link()> Dim MyPaddock As Paddock
   		[Link] Swim3 swim;
   		[Link] Nutrient nutrient;
   		[Link] Clock clock;
   		[Link] ISoilWater waterBalance;

   		// Parameter variables:
   		[Description("Date that autumn urine is applied")]
   		public string AutumnUrinePatch_date_str { get; set;}
   		
   		[Description("Date that spring urine is applied")]
   		public string SpringUrinePatch_date_str { get; set;}

  		[Description("Type the amount of water to apply (mm):")]
   		[Units("mm")]
  		public double Urine_Water_to_add { get; set;}
  		
   		[Description("Type the amount of urea N to apply (kg/ha):")]
   		[Units("kg/ha")]
   		public double Urine_N_to_add { get; set;}
   		
  		[Description("Type the amount of Br to apply (kg/ha):")]
   		[Units("kg/ha")] 
   		public double Br_to_add { get; set;}
   
  		[Description("The depth reached by urine (mm):")]
   		public double Depth_for_urine { get; set;}
   
   		public enum UrineLevelOptions { None, Autumn, Spring }
   		
   		// Variables read from other modules
	    [Description("The urine level:")]
   		public UrineLevelOptions UrineLevel {get; set; }    

		// Output variables
		private double Urine;        // Amount of urine applied today
   		private DateTime UrinePatch_date;

   		// Internal variables
   		private DateTime AutumnUrinePatch_date;
   		private DateTime SpringUrinePatch_date;
   		private DateTime AppDate;             // The date when urine applications start (in date format)
   		private DateTime Today;               // The date of today (in date format)
   		private double[] Urine_prop;          // The potential proportion of urine for each soil layer
   		private double[] Urine_prop_cum;      // The potential proportion of urine for each soil layer
   		private double SoilDepth;             // The soil depth (mm)
   		private bool Add_Urine;

		[EventSubscribe("StartOfSimulation")]
        private void OnStartOfSimulation(object sender, EventArgs e)
		{
			//Debugger.Break();
			
      		// Put the dates into date format:
      		AutumnUrinePatch_date = DateTime.Parse(AutumnUrinePatch_date_str);
      		SpringUrinePatch_date = DateTime.Parse(SpringUrinePatch_date_str);
      	
	      	if (UrineLevel == UrineLevelOptions.None)
	         	UrinePatch_date = new DateTime(2020, 12, 31);    // ie - not within this simulation
      		else if (UrineLevel == UrineLevelOptions.Autumn)
         		UrinePatch_date = AutumnUrinePatch_date; 
      		else if (UrineLevel == UrineLevelOptions.Spring)
         		UrinePatch_date = SpringUrinePatch_date; 
      		else
         		throw new Exception("Incorrect urine date information");

      		Urine_prop = new double[waterBalance.Thickness.Length];
  		    Urine_prop_cum = new double[waterBalance.Thickness.Length];
  
      		SoilDepth = 0.0;
      		for (int z = 0; z < waterBalance.Thickness.Length; z++)
      		{
	        	if (SoilDepth <= Depth_for_urine)   // this is at start depth
           			Urine_prop[z] = waterBalance.Thickness[z] / Depth_for_urine;
         		else
            		Urine_prop[z] = 0.0;
         
         		SoilDepth += waterBalance.Thickness[z];   // no updated to end current depth
         
         		if (z == 0)
            		Urine_prop_cum[z] = Urine_prop[z];
         		else
            		Urine_prop_cum[z] = Urine_prop[z] + Urine_prop_cum[z - 1];

         		if (Urine_prop_cum[z] <= 1.0)
         		{
            		// do nothing
            	}
         		else
         		{
            		Urine_prop[z] = Math.Max(0.0, 1.0 - Urine_prop_cum[z - 1]);
            		Urine_prop_cum[z] = Urine_prop[z] + Urine_prop_cum[z - 1];
         		}
      		}
    	}
    	
		[EventSubscribe("DoManagement")]
        private void OnDoManagement(object sender, EventArgs e)
      	{
      		Urine = 0.0;
   
	      	Add_Urine = clock.Today == UrinePatch_date;
      
      		if (Add_Urine)
      		{
         		double[] Ini_swdep = waterBalance.SWmm;
         		double[] Ini_urea  = nutrient.Urea.kgha;

		        Urine = Urine_N_to_add;

         		double[] New_swdep = new double[waterBalance.Thickness.Length];         
         		double[] New_urea = new double[waterBalance.Thickness.Length];

		        for (int z = 0; z < waterBalance.Thickness.Length; z++)
		        {
            		New_swdep[z] = Ini_swdep[z] + Urine_prop[z] * Urine_Water_to_add;
            		New_urea[z] = Ini_urea[z] + Urine_prop[z] * Urine_N_to_add;
            	}
	         
		        nutrient.Urea.SetKgHa(SoluteSetterType.Other, New_urea);
      		}
      	}
	}
}
```
        Manager Fert
          FertDates_str = 21-feb-2011 28-mar-2011 04-may-2011 31-may-2011 31-aug-2011 29-sep-2011 7-nov-2011 5-dec-2011 28-feb-2012 30-mar-2012 30-apr-2012 31-may-2012
```csharp
using Models.Climate;
using APSIM.Shared.Utilities;
using Models.Soils.Nutrients;
using Models.Soils;
using Models.PMF;
using Models.Core;
using System.Xml.Serialization;
using System;
using Models.AgPasture;
using Models.Interfaces;
using System.Linq;

namespace Models
{
	// This module estimate the amount of NH3 in the soil and its volatilisation
    [Serializable] 
    [System.Xml.Serialization.XmlInclude(typeof(Model))]
    public class Script : Model
    {

	    [Link]
    	private Fertiliser fertiliser;

  	    [Link]
    	private Clock clock;

	    [Description("Dates for fertiliser applications:")]
    	public string FertDates_str { get; set; }
    
	    public int FertLevel { get; set; }
    	
    
	    private double FertAmt;
    	private string[] FertDates_strArr;
	    private DateTime[] FertDates;
	    private bool Add_fert;

		[EventSubscribe("StartOfSimulation")]
        private void OnStartOfSimulation(object sender, EventArgs e)
		{

        	if (FertLevel == 0)
	            FertAmt = 0.0;
        	else if (FertLevel == 2)
        	    FertAmt = 25.0;
        	else if (FertLevel == 4)
        	    FertAmt = 50.0;
        	else
        	    throw new Exception("Incorrect fertilser level information");

        	FertDates_strArr = makeArray(FertDates_str);
        	FertDates = new DateTime[FertDates_strArr.Length];
        	for (int i = 0, loopTo = FertDates_strArr.Length - 1; i <= loopTo; i++)
            	FertDates[i] = DateTime.Parse(FertDates_strArr[i]);
    	}

	    [EventSubscribe("DoManagement")]
        private void OnDoManagement(object sender, EventArgs e)
	    {
	        Add_fert = false;
	        for (int i = 0, loopTo = FertDates.Length - 1; i <= loopTo; i++)
	        {
	            if (clock.Today == FertDates[i])
	            {
	                Add_fert = true;
	                fertiliser.Apply(FertAmt, Fertiliser.Types.UreaN, Depth:5.0);
	            }
	        }
	    }

    	public string[] makeArray(string ArrayString)
    	{
        	string[] MyArray_string;
        	// Dim MyArray_single As String()
        	char[] Separator = " ".ToCharArray();

        	// 1-Split string into array
        	MyArray_string = ArrayString.Split(Separator, StringSplitOptions.RemoveEmptyEntries);

        	// '2-convert array into type single
        	// ReDim MyArray_single(MyArray_string.Length - 1)      
        	// For i As Integer = 0 To MyArray_single.length - 1
        	// MyArray_single(i) = MyArray_string(i)
        	// Next
        	return MyArray_string;
    	}
	}
}
```
        Manager CalculateRollingWaterBalance
```csharp
using Models.Climate;
using APSIM.Shared.Utilities;
using Models.Soils.Nutrients;
using Models.Soils;
using Models.PMF;
using Models.Core;
using System.Xml.Serialization;
using System;
using Models.AgPasture;
using Models.Interfaces;
using System.Linq;

namespace Models
{
    [Serializable] 
    [System.Xml.Serialization.XmlInclude(typeof(Model))]
    public class Script : Model
    {
        [Link] Clock clock;
        [Link] ISummary summary;
        [Link] IWeather weather;
        [Link] Irrigation irrigation;
        [Link] private ISoilWater waterBalance;
        [Link] private IPlant[] plants;

  
        // add (no3+nh4) uptake as N uptake to IPlant

        public double WaterBalanceCumulative  { get; set; }
        public double WaterBalanceToday  { get; set; }

        public double SoilWaterAtInitialisation  { get; set; }
        public double SoilWaterYesterday  { get; set; }
		public double SoilWaterNow  { get; set; }

		public double PlantWaterUptake { get; set; }

        public double WaterAddedToday  { get; set; }
        public double WaterRemovedToday  { get; set; }
        public double WaterAddedCumulative  { get; set; }
        public double WaterRemovedCumulative  { get; set; }



        [EventSubscribe("DoDailyInitialisation")]
        private void DoDailyInitialisation(object sender, EventArgs e)
        {
        	if (clock.Today == clock.StartDate) 
        	// capture the water in and on the soil as a starting point
        	// doing this here as need the models to have intialised first
        	{
	        	SoilWaterAtInitialisation = waterBalance.Pond;
    	    	for (int i = 0; i < waterBalance.SWmm.Length; i++)
        			SoilWaterAtInitialisation += waterBalance.SWmm[i];

        		SoilWaterYesterday = SoilWaterAtInitialisation;		
        		WaterAddedCumulative = 0.0;
        		WaterRemovedCumulative = 0.0;
        		SoilWaterNow = 0.0;
        	}
        	else
        	{
        		SoilWaterYesterday = SoilWaterNow;		// SoilWaterNow holds the value calculated at reporting yesterday
        		WaterAddedToday = 0.0;
        		WaterRemovedToday = 0.0;
        	}
		}

        [EventSubscribe("DoReportCalculations")]
        private void DoReportCalculations(object sender, EventArgs e)
        {
        	// All the WaterBalance variables should be zero. A positive value is a generation of water.
        	SoilWaterNow = waterBalance.Pond;
        	for (int i = 0; i < waterBalance.SWmm.Length; i++)
        		SoilWaterNow += waterBalance.SWmm[i]; // so all the water stored in or on the soil

        	WaterAddedToday = weather.Rain + irrigation.IrrigationApplied;   // Can there be runon? Probably not but this will throw an error if that ever happens
        	WaterAddedCumulative+= WaterAddedToday;

        	WaterRemovedToday = waterBalance.Drainage + waterBalance.Es + waterBalance.Runoff;
        	PlantWaterUptake = 0.0;
        	foreach (var plant in plants)
        		PlantWaterUptake += plant.WaterUptake.Sum();

        	WaterRemovedToday += PlantWaterUptake;
        	// Need to add subsurface drainage here

        	WaterRemovedCumulative += WaterRemovedToday;

        	WaterBalanceToday = WaterAddedToday - WaterRemovedToday - (SoilWaterNow - SoilWaterYesterday);
        	WaterBalanceCumulative = WaterAddedCumulative - WaterRemovedCumulative - (SoilWaterNow - SoilWaterAtInitialisation);
        	// need to add a warning value and a crash value and make a crash
		}
    }
}
```
        Manager FiddleWithClover
```csharp
using Models.Climate;
using APSIM.Shared.Utilities;
using Models.Soils.Nutrients;
using Models.Soils;
using Models.PMF;
using Models.Core;
using System.Xml.Serialization;
using System;
using Models.AgPasture;
using Models.Interfaces;
using System.Linq;

namespace Models
{
    [Serializable] 
    [System.Xml.Serialization.XmlInclude(typeof(Model))]
    public class Script : Model
    {
        [Link] Clock clock;
        [Link] ISummary summary;
        [Link] IWeather weather;
        [Link] Irrigation irrigation;
        [Link] private ISoilWater waterBalance;
        [Link] private IPlant[] plants;
        [Link(ByName=true)] PastureSpecies AGPWhiteClover;





        [EventSubscribe("DoDailyInitialisation")]
        private void DoDailyInitialisation(object sender, EventArgs e)
        {
        	if (clock.Today == clock.StartDate) 
			{
				AGPWhiteClover.LightExtinctionCoefficient = 0.25;
			}
        	else
        	{
        	}

		}

        [EventSubscribe("DoReportCalculations")]
        private void DoReportCalculations(object sender, EventArgs e)
        {
        }

    }
}
```
        Operations Cutting
          2010-12-21  [SimpleGrazing].GrazeToResidual(1600)
          2011-01-06  [SimpleGrazing].GrazeToResidual(1600)
          2011-02-20  [SimpleGrazing].GrazeToResidual(1600)
          2011-03-23  [SimpleGrazing].GrazeToResidual(1600)
          2011-04-29  [SimpleGrazing].GrazeToResidual(1600)
          2011-04-11  [SimpleGrazing].GrazeToResidual(1600)
          2011-05-31  [SimpleGrazing].GrazeToResidual(1600)
          2011-06-27  [SimpleGrazing].GrazeToResidual(1600)
          2011-07-28  [SimpleGrazing].GrazeToResidual(1600)
          2011-09-06  [SimpleGrazing].GrazeToResidual(1600)
          2011-09-28  [SimpleGrazing].GrazeToResidual(1600)
          2011-10-16  [SimpleGrazing].GrazeToResidual(1600)
          2011-11-03  [SimpleGrazing].GrazeToResidual(1600)
          2011-11-17  [SimpleGrazing].GrazeToResidual(1600)
          2011-12-05  [SimpleGrazing].GrazeToResidual(1600)
          2011-12-19  [SimpleGrazing].GrazeToResidual(1600)
          2012-01-12  [SimpleGrazing].GrazeToResidual(1600)
          2012-02-07  [SimpleGrazing].GrazeToResidual(1600)
          2012-03-13  [SimpleGrazing].GrazeToResidual(1600)
          2012-04-13  [SimpleGrazing].GrazeToResidual(1600)
          2012-05-17  [SimpleGrazing].GrazeToResidual(1600)
          2012-07-02  [SimpleGrazing].GrazeToResidual(1600)
          2012-08-24  [SimpleGrazing].GrazeToResidual(1600)
        Operations NonTrt_Fert
          2010-12-21  [Fertiliser].Apply(10, Fertiliser.Types.NO3N, 1);
          2010-12-21  [Fertiliser].Apply(10, Fertiliser.Types.NO3N, 10);
          2010-12-21  [Fertiliser].Apply(5, Fertiliser.Types.NO3N, 20);
        Operations Irrig
          2010-12-27  [Irrigation].Apply(5.3);
          2010-12-31  [Irrigation].Apply(5.3);
          2011-01-03  [Irrigation].Apply(5.3);
          2011-01-05  [Irrigation].Apply(5.3);
          2011-01-07  [Irrigation].Apply(5.3);
          2011-01-11  [Irrigation].Apply(5.3);
          2011-01-12  [Irrigation].Apply(95.4);
          2011-01-13  [Irrigation].Apply(53.0);
          2011-01-14  [Irrigation].Apply(106.0);
          2011-01-17  [Irrigation].Apply(79.5);
          2011-01-18  [Irrigation].Apply(106.0);
          2011-01-19  [Irrigation].Apply(106.0);
          2011-01-20  [Irrigation].Apply(106.0);
          2011-01-25  [Irrigation].Apply(79.5);
          2011-01-26  [Irrigation].Apply(53);
          2011-02-21  [Irrigation].Apply(10);
          2011-03-28  [Irrigation].Apply(10);
          2011-05-04  [Irrigation].Apply(10);
          2011-05-31  [Irrigation].Apply(10);
          2011-08-31  [Irrigation].Apply(10);
          2011-09-29  [Irrigation].Apply(10);
          2011-11-07  [Irrigation].Apply(10);
          2011-12-05  [Irrigation].Apply(10);
          2012-02-28  [Irrigation].Apply(10);
          2012-03-30  [Irrigation].Apply(10);
          2012-04-30  [Irrigation].Apply(10);
          2012-05-31  [Irrigation].Apply(10);
          0001-01-01
          0001-01-01
          0001-01-01
        Irrigation
        Fertiliser
        SimpleGrazing: GrazingRotationType=2; SimpleGrazingFrequencyString=21; SimpleMinGrazable=0; SimpleGrazingResidual=1500; FlexibleGrazePostDM=0; FractionDefoliatedNToSoil=[0.7]; FractionExcretedNToDung=[0.45]; CNRatioDung=0; DepthUrineIsAdded=250; FractionPopulationDecline=0; TramplingOn=false; MaximumPropLitterMovedToSoil=0.1; PastureConsumedAtMaximumRateOfLitterRemoval=1200
          PreGrazeDMArray=[1000, 1000, 1000, 1000, 1000, 1000, 1000, 1000, 1000, 1000, 1000, 1000]
          PostGrazeDMArray=[2000, 2000, 2000, 2000, 2000, 2000, 2000, 2000, 2000, 2000, 2000, 2000]
        PastureSpecies AGPRyegrass: InitialShootDM=2500; InitialRootDM=500; InitialRootDepth=350
        PastureSpecies AGPWhiteClover: InitialShootDM=500; InitialRootDM=250; InitialRootDepth=300
        SurfaceOrganicMatter: InitialResidueName=grass; InitialResidueType=grass; InitialResidueMass=20; InitialStandingFraction=0; InitialCPR=0; InitialCNR=17
        Soil: SoilType=Black Vertosol; Site=Jimbour; NearestTown=Jimbour, Q 4352; Region=South East Queensland; NaturalVegetation=Grassland, mainly Qld bluegrass; Latitude=0; Longitude=0
          Physical
            Thickness  ParticleSizeClay  ParticleSizeSand  ParticleSizeSilt  Rocks  BD     AirDry  LL15   DUL    SAT    KS
            60         17.61             33.77             48.62             0      0.865  0.077   0.231  0.565  0.58   80
            110        16.36             33.91             49.73             0      0.835  0.069   0.207  0.515  0.606  80
            140        16.42             35.91             47.67             0      0.805  0.068   0.205  0.514  0.617  80
            240        29.03             46.26             24.71             0      0.83   0.088   0.264  0.475  0.62   80
            150        18.44             53.54             28.02             0      0.82   0.097   0.29   0.481  0.625  80
            SoilCrop AgPRyegrassSoil: LL=[0.231, 0.231, 0.231, 0.231, 0.231]; KL=[0.05, 0.05, 0.05, 0.05, 0]; XF=[1, 1, 1, 1, 0]
            SoilCrop AgPWhiteCloverSoil: LL=[0.231, 0.231, 0.231, 0, 0]; KL=[0.05, 0.05, 0.05, 0, 0]; XF=[1, 1, 1, 0, 0]
          Organic: FOMCNRatio=40
            Thickness  Carbon  SoilCNRatio  FBiom  FInert  FOM
            60         8.2     12.5         0.08   0.58    92.8733
            110        5.5     12.5         0.02   0.7     57.9632
            140        3.3     12.5         0.015  0.77    31.8109
            240        1.7     12.5         0.01   0.9     11.3729
            150        1.7     12.5         0.01   0.99    5.97975
          InitialWater Initial water: PercentMethod=0; FractionFull=0.86; RelativeTo=LL15
          Chemical
            Thickness  NO3N   NH4N      PH
            60         6.503  0.599004  5.7
            110        2.101  0.100001  5.3
            140        2.101  0.100001  5.9
            240        1.701  0.100001  6.6
            150        1.701  0.1       6.7
          Nutrient
          Swim3 Swim: Salb=0.13; CNRed=20; CNCov=0.8; KDul=1; PSIDul=-100; VC=true; DTMax=60; MaxWaterIncrement=5; Diagnostics=false
            zero: PrecipitationInterception, CN2Bare, DTMin, SpaceWeightingFactor, SoluteSpaceWeightingFactor, Dis, Disp, A, DTHC, DTHP, WaterTable
            SwimSoluteParameters Urea: WaterTableConcentration=0; D0=0.05
              Thickness  Exco  FIP
              60         0     1
              110        0     1
              140        0     1
              240        0     1
              150        0     1
            SwimSoluteParameters NO3: WaterTableConcentration=0; D0=0.05
              Thickness  Exco  FIP
              60         0     1
              110        0     1
              140        0     1
              240        0     1
              150        0     1
            SwimSoluteParameters NH4: WaterTableConcentration=0; D0=0.05
              Thickness  Exco  FIP
              60         5     1
              110        5     1
              140        5     1
              240        5     1
              150        5     1
            SwimSoluteParameters CL: WaterTableConcentration=0; D0=0.05
              Thickness  Exco  FIP
              60         0     1
              110        0     1
              140        0     1
              240        0     1
              150        0     1
            SwimSoluteParameters LabileP: WaterTableConcentration=0; D0=0.05
              Thickness  Exco  FIP
              60         0     1
              110        0     1
              140        0     1
              240        0     1
              150        0     1
            SwimSoluteParameters UnavailableP: WaterTableConcentration=0; D0=0.05
              Thickness  Exco  FIP
              60         0     1
              110        0     1
              140        0     1
              240        0     1
              150        0     1
            SwimSoluteParameters NH41 (disabled): WaterTableConcentration=0; D0=0.05
              Thickness  Exco    FIP
              60         16.973  0.721
              110        24.523  0.635
              140        29.27   0.586
              240        51.537  0.442
              150        37.322  0.517
          CERESSoilTemperature Temperature (disabled)
          LayerStructure: Thickness=[10, 20, 30, 40, 50, 50, 50, 50, 100, 100, 50, 50, 50, 50]
          SoilTemperature
        Report: EventNames=if Clock.Today >= new DateTime(2011, 2, 21)
          VariableNames:
            [Clock].Today
            [Weather].Rain
            [Irrigation].IrrigationApplied
            [AGPRyegrass].AboveGroundWt + [AGPWhiteClover].AboveGroundWt as AboveGroundBiomass
            [AGPRyegrass].HarvestedWt + [AGPWhiteClover].HarvestedWt as HarvestedWt
            [AGPRyegrass].HarvestedN + [AGPWhiteClover].HarvestedN as HarvestedN
            [Swim].Drainage
            [Swim].LeachNO3
            [Swim].LeachNH4
            sum([Nutrient].DenitrifiedN) as DenitrifiedN
            sum([Nutrient].N2Oatm[1:5]) as N2Oatm
            //sum([nh3_volatilisation].Script.emission_nh3) as emission_nh3
            //CumPrecip
            // SWdep
            // Satdep
            // Duldep
            // ll15dep
            // CumDrain
            // Dul_l as dul
            // ll15_l as ll15
            // sw_l as sw
            // AboveGroundWt as Herbage
            // AboveGroundLiveWt as Live
            // AboveGroundDeadWt as Dead
            // SpeciesLiveWt(1) as RyeGrass
            // SpeciesLiveWt(2) as Clover
            // cumHarvestWt
            // HarvestWt
            // cumHarvestN
            // HarvestN
            // urea_l as urea
            // nh4_l as nh4
            // no3_l as no3
            // leach_urea
            // leach_nh4
            // leach_no3
            // cumleach_no3
            // cumleach_nh4
            // dnit() as tot_denit format 3
            // n2o_atm() as n2o_denit format3
            // cum_dnit
            // cum_n2o_atm
            // SoilpH(1)
            // min_n_l as min_n
            // org_n_l as org_n
            // biom_n_l as biom_n
            // fom_n_l as fom_n
            // hum_n_l as hum_n
            // dlt_biom_n_l as dlt_biom_n
            // dlt_fom_n_l as dlt_fom_n
            // dlt_hum_n_l as dlt_hum_n
            // dlt_org_n_l as dlt_org_n
            // dlt_min_n_l as dlt_min_n
            // emission_nh3() as Volat
            // urea
            // nh4
            // n2o_atm() as AllN2O format 6
            // n2o_atm_denitrification() as DenitN2O format 6
            // n2o_atm_nitrification()  as NitrifN2O format 6
            // n2o_atm as AllN2OByLayer format 6
            // carbon_tot
            // fom_c
            // hum_c
            // biom_c
        Report WaterBalanceReport: EventNames=if Clock.Today >= new DateTime(2011, 2, 21)
          VariableNames:
            [Clock].Today
            [MicroClimate].NumLayers
            [MicroClimate].PetTotal
            [Swim].Eo
            [Swim].Eos
            [Weather].Rain + [Irrigation].IrrigationApplied as RainIrrig
            [Swim].Drainage
            [Swim].Es
            [AgPRyegrass].WaterDemand as RyegrassDemand
            sum([AgPRyegrass].WaterUptake) as RyegrassUptake
            [AgPWhiteClover].WaterDemand as CloverDemand
            sum([AgPWhiteClover].WaterUptake) as CloverUptake
            [AgPRyegrass].WaterDemand + [AgPWhiteClover].WaterDemand as SwardDemand
            sum([AgPRyegrass].WaterUptake) + sum([AgPWhiteClover].WaterUptake) as SwardUptake
            sum([AgPRyegrass].WaterUptake) + sum([AgPWhiteClover].WaterUptake) + [Swim].Es as EvapoTran
            [CalculateRollingWaterBalance].Script.WaterBalanceCumulative
        Report Competition: EventNames=if Clock.Today >= new DateTime(2011, 2, 21)
          VariableNames:
            [Clock].Today
            [AgPRyegrass].AboveGroundWt as Ryegrass
            [AgPWhiteClover].AboveGroundWt as Clover
            [AgPRyegrass].AboveGroundWt / ([AgPRyegrass].AboveGroundWt + [AgPWhiteClover].AboveGroundWt + 0.01) as PropRyegrass
            [AgPRyegrass].HarvestedFraction as RyegrassFracHarested
            [AgPRyegrass].HarvestedWt as RyegrassHarvested
            [AgPWhiteClover].HarvestedFraction as CloverFracHarested
            [AgPWhiteClover].HarvestedWt as CloverHarvested
            [AgPRyegrass].HarvestedWt / ([AgPRyegrass].HarvestedWt + [AgPWhiteClover].HarvestedWt + 0.01) as PropHarvestRyegrass
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