Simulations: Version=138
  DataStore
  Folder LowerBCEffect
    Experiment
      Factors
        Factor Gradient: Specification=[SetLowerBC].Script.LowerBCType=gradient
        Factor Seepage: Specification=[SetLowerBC].Script.LowerBCType=seepage
        Factor Potential: Specification=[SetLowerBC].Script.LowerBCType=potential
      Simulation Base
        Weather WeatherLinc (disabled)
          FileName=C:\aaUnderVC\APSIMX\ApsimX\Examples\WeatherFiles\lincoln.met
        ControlledEnvironment Weather: MaxT=15; MinT=15; AirPressure=1010
          zero: Rain, Radn, PanEvap, VP, Wind, CO2, DiffuseFraction, Latitude, Longitude, DayLength, SunRise, SunSet
        Clock: Start=2000-01-01; End=2000-02-28
        Summary summaryfile
        SoilArbitrator
        MicroClimate: a_interception=0; b_interception=0; c_interception=0; d_interception=0; SoilHeatFluxFraction=0; MinimumHeightDiffForNewLayer=0; NightInterceptionFraction=0; ReferenceHeight=2
        Zone paddock: Area=1; Slope=0; AspectAngle=0; Altitude=50
          SlopeEffectsOnWeather (disabled): SurroundsAlbedo=0.2; dRain=-100; A_diffuseRadn=-3.664; B_diffuseRadn=7.011; TurbidityCoefficient=0.95; a_ki=0.98; b_ki=0.00146; c_ki=0.075; d_ki=0.4; a_pw=2.1; b_pw=0.14; aT0=1.61; bT=0.88; cT=0.12; FN=0.81; FM=0.5; RainMeasured=-0.1; WindSpeedMeasured=-0.1; VPMeasured=-0.1
            zero: FracRadnDirect, dWind, dVapPressure, RadnMeasured, RadnDirect, RadnDiffuse, RadnReflected, ExtraterrestrialRadn, MaxDirSunlightLength, ActualDirSunlightLength, ClearnessIndex, DiffuseRadnFraction, DirRadnRatio, DiffRadnRatio, FracRadnDiffuse, FracRadnReflected, TminMeasured, TmaxMeasured, dltTmin, dltTmax, AtmosphericPressure
          Operations IrrigationSchedule
            2000-01-01  [Irrigation].Apply(amount:100,duration:60);
            2000-01-02  [Irrigation].Apply(amount:100,duration:60);
            // 2000-03-01  [Irrigation].Apply(amount:100,duration:60);
            // 2000-04-01  [Irrigation].Apply(amount:100,duration:60);
            // 2000-05-01  [Irrigation].Apply(amount:100,duration:60);
            // 2000-06-01  [Irrigation].Apply(amount:100,duration:60);
          Manager SetLowerBC
            LowerBCType = gradient
```csharp
using Models.Climate;
using APSIM.Shared.Utilities;
using Models.Soils.Nutrients;
using Models.Soils;
using Models.PMF;
using Models.Core;
using System.Xml.Serialization;
using System;
using Models.AgPasture;
using Models.Interfaces;

namespace Models
{
    [Serializable] 
    [System.Xml.Serialization.XmlInclude(typeof(Model))]
    public class Script : Model
    {
        [Link] Clock clock;
        [Link] ISummary summary;
        [Link] private Swim3 swim;
        //[Link] private PastureSpecies ryegrass;
        [Link] private SimpleGrazing grazing;

        [Description("What lower BC? Current options gradient/seepage/potential")] public string LowerBCType { get; set; }

        public double SoilWaterStart  { get; set; }
        public double SoilWaterEnd  { get; set; }

        [EventSubscribe("DoDailyInitialisation")]
        private void DoDailyInitialisation(object sender, EventArgs e)
        {
        	SoilWaterStart = 0.0;
        	for (int i = 0; i < swim.SWmm.Length; i++)
        		SoilWaterStart += swim.SWmm[i] + swim.pond;
		}

        [EventSubscribe("DoReportCalculations")]
        private void DoReportCalculations(object sender, EventArgs e)
        {
        	SoilWaterEnd = 0.0;
        	for (int i = 0; i < swim.SWmm.Length; i++)
        		SoilWaterEnd += swim.SWmm[i]  + swim.pond;
		}

        [EventSubscribe("DoManagement")]
        private void DoDailyCalculations(object sender, EventArgs e)
        {
        	if (clock.Today == clock.StartDate)
        	{
        		summary.WriteMessage(this, "Script is setting lower boundary condition to " + LowerBCType);
        		if (LowerBCType.ToLower() == "seepage")
        			swim.bbc_seepage_potential = 0.0;
        		else if (LowerBCType.ToLower() == "gradient")
        			swim.bbc_gradient = 1.0;
        		else if (LowerBCType.ToLower() == "potential")
        			swim.bbc_potential = 0.0;
        	}
        }
    }
}
```
          Soil: Latitude=0; Longitude=0
            Physical
              Thickness  ParticleSizeClay  ParticleSizeSand  ParticleSizeSilt  Rocks  BD     AirDry  LL15   DUL    SAT    KS
              60         17.61             33.77             48.62             0      0.865  0.077   0.231  0.565  0.58   216
              110        16.36             33.91             49.73             0      0.835  0.069   0.207  0.515  0.606  1188
              140        16.42             35.91             47.67             0      0.805  0.068   0.205  0.514  0.617  2160
              240        29.03             46.26             24.71             0      0.83   0.088   0.264  0.475  0.62   3528
              150        18.44             53.54             28.02             0      0.82   0.097   0.29   0.481  0.625  5376
              SoilCrop AgPRyegrassSoil: LL=[0.231, 0.207, 0.205, 0.264, 0.29]; KL=[0.1, 0.1, 0.1, 0.1, 0]; XF=[1, 1, 1, 1, 0]
            SoilNitrogen: fom_types=[default, manure, mucuna, lablab, shemp, stable]; fract_carb=[0.2, 0.3, 0.54, 0.57, 0.45, 0]; fract_cell=[0.7, 0.3, 0.37, 0.37, 0.47, 0.1]; fract_lign=[0.1, 0.4, 0.09, 0.06, 0.08, 0.9]; NPartitionApproach=0
              SoilNitrogenNO3 NO3
              SoilNitrogenNH4 NH4
              SoilNitrogenUrea Urea
              SoilNitrogenPlantAvailableNO3 PlantAvailableNO3
              SoilNitrogenPlantAvailableNH4 PlantAvailableNH4
            Organic: FOMCNRatio=40
              Thickness  Carbon  SoilCNRatio  FBiom  FInert  FOM
              60         8.2     12.5         0.08   0.58    92.873
              110        5.5     12.5         0.02   0.7     57.963
              140        3.3     12.5         0.015  0.77    31.811
              240        1.7     12.5         0.01   0.9     11.373
              150        1.7     12.5         0.01   0.99    0
            Chemical
              Thickness  NO3N   NH4N   PH   CL
              60         6.503  0.599  5.7  10
              110        2.101  0.1    5.3  10
              140        2.101  0.1    5.9  10
              240        1.701  0.1    6.6  10
              150        1.701  0.1    6.7  10
            Sample Initial water: Thickness=[60, 110, 140, 240, 150]; SW=[0.58, 0.606, 0.617, 0.62, 0.625]; SWUnits=Volumetric; OCUnits=Total; PHUnits=Water
            CERESSoilTemperature Temperature
            Swim3: PrecipitationInterception=0; Salb=0.13; CN2Bare=0; CNRed=20; CNCov=0.8; KDul=0.1; PSIDul=-100; VC=true; DTMin=0; DTMax=1440; MaxWaterIncrement=10; SpaceWeightingFactor=0; SoluteSpaceWeightingFactor=1; Dis=0; Disp=1; A=2; DTHC=0.1; DTHP=2; Diagnostics=true; WaterTable=0
              SwimSoluteParameters Urea: WaterTableConcentration=0; D0=0.05
                Thickness  Exco  FIP
                60         0     1
                110        0     1
                140        0     1
                240        0     1
                150        0     1
              SwimSoluteParameters NH4: WaterTableConcentration=0; D0=0.05
                Thickness  Exco  FIP
                60         1     1
                110        1     1
                140        1     1
                240        1     1
                150        1     1
              SwimSoluteParameters NO3: WaterTableConcentration=0; D0=0.05
                Thickness  Exco  FIP
                60         0     1
                110        0     1
                140        0     1
                240        0     1
                150        0     1
              SwimSoluteParameters CL: WaterTableConcentration=0; D0=0.05
                Thickness  Exco  FIP
                60         0     1
                110        0     1
                140        0     1
                240        0     1
                150        0     1
              SwimSoluteParameters PlantAvailableNH4: WaterTableConcentration=0; D0=0.05
                Thickness  Exco  FIP
                60         1     1
                110        1     1
                140        1     1
                240        1     1
                150        1     1
              SwimSoluteParameters PlantAvailableNO3: WaterTableConcentration=0; D0=0.05
                Thickness  Exco  FIP
                60         0     1
                110        0     1
                140        0     1
                240        0     1
                150        0     1
            Solute CL
            InitialWater Initial water: PercentMethod=0; FractionFull=1
            LayerStructure: Thickness=[10, 20, 30, 40, 50, 50, 50, 50, 100, 100, 50, 50, 50, 50]
          Irrigation
          Fertiliser
          SurfaceOrganicMatter: InitialResidueName=grass; InitialResidueType=grass; InitialResidueMass=20; InitialStandingFraction=0; InitialCPR=0; InitialCNR=17
          PastureSpecies AGPRyegrass (disabled): InitialShootDM=2500; InitialRootDM=500; InitialRootDepth=350
          SimpleGrazing: GrazingRotationType=2; SimpleMinGrazable=0; SimpleGrazingResidual=0; FlexibleGrazePostDM=0; FractionDefoliatedNToSoil=[0]; CNRatioDung=0; DepthUrineIsAdded=0; FractionPopulationDecline=0; TramplingOn=false; MaximumPropLitterMovedToSoil=0.1; PastureConsumedAtMaximumRateOfLitterRemoval=1200
          Report: EventNames=[Clock].EndOfDay
            VariableNames:
              [SetLowerBC].Script.LowerBCType
              [Clock].Today as Date
              [Soil].Swim3.psi
              [Soil].Swim3.SW
              [Weather].Rain
              [Irrigation].IrrigationApplied
              [Soil].Swim3.Drainage
              [Soil].Swim3.Es
              [Soil].Swim3.Runoff
              //sum([AgPRyegrass].WaterUptake[:]) as WaterUptake
              [SetLowerBC].Script.SoilWaterStart
              [SetLowerBC].Script.SoilWaterEnd
              /// Water balance
              [Weather].Rain + [Irrigation].IrrigationApplied as WaterAdded
              [Soil].Swim3.Drainage + [Soil].Swim3.Es + [Soil].Swim3.Runoff + 0.0 as WaterRemoved // don't forget to add in plant uptake
              //[Soil].Swim3.Drainage + [Soil].Swim3.Es + [Soil].Swim3.Runoff + sum([AgPRyegrass].WaterUptake[:]) as WaterRemoved // don't forget to add in plant uptake
              ([SetLowerBC].Script.SoilWaterEnd - [SetLowerBC].Script.SoilWaterStart) as WaterStoredInc
              ([Weather].Rain + [Irrigation].IrrigationApplied) - ([Soil].Swim3.Drainage + [Soil].Swim3.Es + [Soil].Swim3.Runoff + 0.0) - ([SetLowerBC].Script.SoilWaterEnd - [SetLowerBC].Script.SoilWaterStart) as SoilWaterBalance
              //([Weather].Rain + [Irrigation].IrrigationApplied) - ([Soil].Swim3.Drainage + [Soil].Swim3.Es + [Soil].Swim3.Runoff + sum([AgPRyegrass].WaterUptake[:])) - ([SetLowerBC].Script.SoilWaterEnd - [SetLowerBC].Script.SoilWaterStart) as SoilWaterBalance
          PastureSpecies AGPWhiteClover (disabled): InitialShootDM=500; InitialRootDM=250; InitialRootDepth=300
  Folder DrainageGradient
    Experiment Experiment1
      Factors
        Factor Gradient: Specification=[SetLowerBC].Script.LowerBCType=gradient
        Factor Seepage (disabled): Specification=[SetLowerBC].Script.LowerBCType=seepage
        Factor Potential (disabled): Specification=[SetLowerBC].Script.LowerBCType=potential
      Simulation Base1
        Weather WeatherLinc (disabled)
          FileName=C:\aaUnderVC\APSIMX\ApsimX\Examples\WeatherFiles\lincoln.met
        ControlledEnvironment Weather: MaxT=15; MinT=15; AirPressure=1010
          zero: Rain, Radn, PanEvap, VP, Wind, CO2, DiffuseFraction, Latitude, Longitude, DayLength, SunRise, SunSet
        Clock: Start=2000-01-01; End=2001-12-31
        Summary summaryfile
        SoilArbitrator
        MicroClimate: a_interception=0; b_interception=0; c_interception=0; d_interception=0; SoilHeatFluxFraction=0; MinimumHeightDiffForNewLayer=0; NightInterceptionFraction=0; ReferenceHeight=2
        Zone paddock: Area=1; Slope=0; AspectAngle=0; Altitude=50
          SlopeEffectsOnWeather (disabled): same as LowerBCEffect.Experiment.Base.paddock.SlopeEffectsOnWeather
          Operations IrrigationSchedule
            2000-01-01  [Irrigation].Apply(amount:100,duration:60);
            2000-01-02  [Irrigation].Apply(amount:100,duration:60);
          Manager SetLowerBC: same as LowerBCEffect.Experiment.Base.paddock.SetLowerBC
          Soil: Latitude=0; Longitude=0
            Physical
              Thickness  ParticleSizeClay  ParticleSizeSand  ParticleSizeSilt  Rocks  BD     AirDry  LL15   DUL    SAT   KS
              60         17.61             33.77             48.62             0      0.865  0.077   0.231  0.565  0.58  216
              110        17.61             33.77             48.62             0      0.865  0.077   0.231  0.565  0.58  216
              140        17.61             33.77             48.62             0      0.865  0.077   0.231  0.565  0.58  216
              240        17.61             33.77             48.62             0      0.865  0.077   0.231  0.565  0.58  216
              150        17.61             33.77             48.62             0      0.865  0.077   0.231  0.565  0.58  216
              SoilCrop AgPRyegrassSoil: LL=[0.231, 0.231, 0.231, 0.231, 0.231]; KL=[0.1, 0.1, 0.1, 0.1, 0]; XF=[1, 1, 1, 1, 0]
            SoilNitrogen: same as LowerBCEffect.Experiment.Base.paddock.Soil.SoilNitrogen
            Organic: same as LowerBCEffect.Experiment.Base.paddock.Soil.Organic
            Chemical: same as LowerBCEffect.Experiment.Base.paddock.Soil.Chemical
            Sample Initial water: same as LowerBCEffect.Experiment.Base.paddock.Soil.Initial water
            CERESSoilTemperature Temperature
            Swim3: PrecipitationInterception=0; Salb=0.13; CN2Bare=0; CNRed=20; CNCov=0.8; KDul=1; PSIDul=-100; VC=true; DTMin=0; DTMax=1440; MaxWaterIncrement=10; SpaceWeightingFactor=0; SoluteSpaceWeightingFactor=1; Dis=0; Disp=1; A=2; DTHC=0.1; DTHP=2; Diagnostics=true; WaterTable=0
              SwimSoluteParameters Urea: WaterTableConcentration=0; D0=0.05
                Thickness  Exco  FIP
                60         0     1
                110        0     1
                140        0     1
                240        0     1
                150        0     1
              SwimSoluteParameters NH4: WaterTableConcentration=0; D0=0.05
                Thickness  Exco  FIP
                60         1     1
                110        1     1
                140        1     1
                240        1     1
                150        1     1
              SwimSoluteParameters NO3: WaterTableConcentration=0; D0=0.05
                Thickness  Exco  FIP
                60         0     1
                110        0     1
                140        0     1
                240        0     1
                150        0     1
              SwimSoluteParameters CL: WaterTableConcentration=0; D0=0.05
                Thickness  Exco  FIP
                60         0     1
                110        0     1
                140        0     1
                240        0     1
                150        0     1
              SwimSoluteParameters PlantAvailableNH4: WaterTableConcentration=0; D0=0.05
                Thickness  Exco  FIP
                60         1     1
                110        1     1
                140        1     1
                240        1     1
                150        1     1
              SwimSoluteParameters PlantAvailableNO3: WaterTableConcentration=0; D0=0.05
                Thickness  Exco  FIP
                60         0     1
                110        0     1
                140        0     1
                240        0     1
                150        0     1
            Solute CL
            InitialWater Initial water: PercentMethod=0; FractionFull=1
            LayerStructure: Thickness=[10, 20, 30, 40, 50, 50, 50, 50, 100, 100, 50, 50, 50, 50]
          Irrigation
          Fertiliser
          SurfaceOrganicMatter: InitialResidueName=grass; InitialResidueType=grass; InitialResidueMass=20; InitialStandingFraction=0; InitialCPR=0; InitialCNR=17
          PastureSpecies AGPRyegrass (disabled): InitialShootDM=2500; InitialRootDM=500; InitialRootDepth=350
          SimpleGrazing: same as LowerBCEffect.Experiment.Base.paddock.SimpleGrazing
          Report: same as LowerBCEffect.Experiment.Base.paddock.Report
          PastureSpecies AGPWhiteClover (disabled): InitialShootDM=500; InitialRootDM=250; InitialRootDepth=300
  Folder (disabled)
    Soil OriginalConvertedBuckthought: SoilType=Black Vertosol; Site=Jimbour; NearestTown=Jimbour, Q 4352; Region=South East Queensland; NaturalVegetation=Grassland, mainly Qld bluegrass; Latitude=0; Longitude=0
      Physical
        Thickness  ParticleSizeClay  ParticleSizeSand  ParticleSizeSilt  BD     AirDry  LL15   DUL    SAT    KS
        60         17.61             33.77             48.62             0.865  0.077   0.231  0.565  0.58   216
        110        16.36             33.91             49.73             0.835  0.069   0.207  0.515  0.606  1188
        140        16.42             35.91             47.67             0.805  0.068   0.205  0.514  0.617  2160
        240        29.03             46.26             24.71             0.83   0.088   0.264  0.475  0.62   3528
        150        18.44             53.54             28.02             0.82   0.097   0.29   0.481  0.625  5376
        SoilCrop AGPRyegrassSoil: LL=[0.231, 0.207, 0.205, 0.264, 0.29]; KL=[0.1, 0.1, 0.1, 0.1, 0]; XF=[1, 1, 1, 1, 0]
      Swim3 Swim: Salb=0.13; CNRed=20; CNCov=0.8; KDul=1; PSIDul=-100; VC=true; DTMax=1440; MaxWaterIncrement=10; Diagnostics=false
        zero: PrecipitationInterception, CN2Bare, DTMin, SpaceWeightingFactor, SoluteSpaceWeightingFactor, Dis, Disp, A, DTHC, DTHP, WaterTable
        SwimSoluteParameters: WaterTableConcentration=0; D0=0; Thickness=[200, 180, 100, 140, 80, 999999]
      SoilNitrogen: fom_types=[default, manure, mucuna, lablab, shemp, stable]; fract_carb=[0.2, 0.3, 0.54, 0.57, 0.45, 0]; fract_cell=[0.7, 0.3, 0.37, 0.37, 0.47, 0.1]; fract_lign=[0.1, 0.4, 0.09, 0.06, 0.08, 0.9]; NPartitionApproach=0
        SoilNitrogenNO3 NO3
        SoilNitrogenNH4 NH4
        SoilNitrogenUrea Urea
        SoilNitrogenPlantAvailableNO3 PlantAvailableNO3
        SoilNitrogenPlantAvailableNH4 PlantAvailableNH4
      CERESSoilTemperature Temperature
      InitialWater Initial water: PercentMethod=0; FractionFull=0.86; RelativeTo=LL15
      Organic: FOMCNRatio=40
        Thickness  Carbon  SoilCNRatio  FBiom  FInert  FOM
        60         8.2     12.5         0.08   0.58    92.8733
        110        5.5     12.5         0.02   0.7     57.9632
        140        3.3     12.5         0.015  0.77    31.8109
        240        1.7     12.5         0.01   0.9     11.3729
        150        1.7     12.5         0.01   0.99    5.97975
      Chemical
        Thickness  NO3N   NH4N      PH
        60         6.503  0.599004  5.7
        110        2.101  0.100001  5.3
        140        2.101  0.100001  5.9
        240        1.701  0.100001  6.6
        150        1.701  0.1       6.7
      LayerStructure: Thickness=[10, 20, 30, 40, 50, 50, 50, 50, 100, 100, 50, 50, 50, 50]
      Sample Initial conditions: Depth=[0-180]; Thickness=[1800]; NH4=[1]; SWUnits=Volumetric; OCUnits=Total; PHUnits=Water
    Folder Manager folder
      Manager Exp1_Urine
      Manager nh3_volatilisation
      Manager Fert
      Manager Exp1Report
      Manager Seepage
```csharp
using Models.PMF;
using Models.Core;
using System;
namespace Models
{
    [Serializable]
    [System.Xml.Serialization.XmlInclude(typeof(Model))]
    public class Script : Model
    {
        [Link] Clock Clock;

        [EventSubscribe("DoManagement")]
        private void OnDoManagement(object sender, EventArgs e)
        {
            /*
                if day = 349 then
   ! set seepage when bottom boundary is saturated
   bbc_seepage_potential = 0
endif
            */
        }
    }
}
```
      Operations Cutting
        0001-01-01
        2010-12-21  // agpasture graze type = residue, amount = 1600.00 (kg/ha)
        2011-01-06  // agpasture graze type = residue, amount = 1600.00 (kg/ha)
        2011-02-20  // agpasture graze type = residue, amount = 1600.00 (kg/ha)
        2011-03-23  // agpasture graze type = residue, amount = 1600.00 (kg/ha)
        2011-04-29  // agpasture graze type = residue, amount = 1600.00 (kg/ha)
        2011-04-11  // agpasture graze type = residue, amount = 1600.00 (kg/ha)
        2011-05-31  // agpasture graze type = residue, amount = 1600.00 (kg/ha)
        2011-06-27  // agpasture graze type = residue, amount = 1600.00 (kg/ha)
        2011-07-28  // agpasture graze type = residue, amount = 1600.00 (kg/ha)
        2011-09-06  // agpasture graze type = residue, amount = 1600.00 (kg/ha)
        2011-09-28  // agpasture graze type = residue, amount = 1600.00 (kg/ha)
        2011-10-16  // agpasture graze type = residue, amount = 1600.00 (kg/ha)
        2011-11-03  // agpasture graze type = residue, amount = 1600.00 (kg/ha)
        2011-11-17  // agpasture graze type = residue, amount = 1600.00 (kg/ha)
        2011-12-05  // agpasture graze type = residue, amount = 1600.00 (kg/ha)
        2011-12-19  // agpasture graze type = residue, amount = 1600.00 (kg/ha)
        2012-01-12  // agpasture graze type = residue, amount = 1600.00 (kg/ha)
        2012-02-07  // agpasture graze type = residue, amount = 1600.00 (kg/ha)
        2012-03-13  // agpasture graze type = residue, amount = 1600.00 (kg/ha)
        2012-04-13  // agpasture graze type = residue, amount = 1600.00 (kg/ha)
        2012-05-17  // agpasture graze type = residue, amount = 1600.00 (kg/ha)
        2012-07-02  // agpasture graze type = residue, amount = 1600.00 (kg/ha)
        2012-08-24  // agpasture graze type = residue, amount = 1600.00 (kg/ha)
      Operations NonTrt_Fert
        2010-12-21  [Fertiliser].Apply(10, Fertiliser.Types., 1);
        2010-12-21  [Fertiliser].Apply(10, Fertiliser.Types., 10);
        2010-12-21  [Fertiliser].Apply(5, Fertiliser.Types., 20);
        0001-01-01
        0001-01-01
        0001-01-01
      Operations Irrig
        2010-12-27  [Irrigation].Apply(5.3);
        2010-12-31  [Irrigation].Apply(5.3);
        2011-01-03  [Irrigation].Apply(5.3);
        2011-01-05  [Irrigation].Apply(5.3);
        2011-01-07  [Irrigation].Apply(5.3);
        2011-01-11  [Irrigation].Apply(5.3);
        2011-01-12  [Irrigation].Apply(95.4);
        2011-01-13  [Irrigation].Apply(53.0);
        2011-01-14  [Irrigation].Apply(106.0);
        2011-01-17  [Irrigation].Apply(79.5);
        2011-01-18  [Irrigation].Apply(106.0);
        2011-01-19  [Irrigation].Apply(106.0);
        2011-01-20  [Irrigation].Apply(106.0);
        2011-01-25  [Irrigation].Apply(79.5);
        2011-01-26  [Irrigation].Apply(53);
        2011-02-21  [Irrigation].Apply(10);
        2011-03-28  [Irrigation].Apply(10);
        2011-05-04  [Irrigation].Apply(10);
        2011-05-31  [Irrigation].Apply(10);
        2011-08-31  [Irrigation].Apply(10);
        2011-09-29  [Irrigation].Apply(10);
        2011-11-07  [Irrigation].Apply(10);
        2011-12-05  [Irrigation].Apply(10);
        2012-02-28  [Irrigation].Apply(10);
        2012-03-30  [Irrigation].Apply(10);
        2012-04-30  [Irrigation].Apply(10);
        2012-05-31  [Irrigation].Apply(10);
        0001-01-01
        0001-01-01
        0001-01-01
    Simulation T1_f0u0
      Manager Trt
      Weather
        FileName=C:\aaUnderVC\APSIMX\ApsimX\Examples\WeatherFiles\lincoln.met
      Clock: Start=2010-12-15; End=2012-08-27
      Summary summaryfile
      SoilArbitrator
      MicroClimate: a_interception=0; b_interception=0; c_interception=0; d_interception=0; SoilHeatFluxFraction=0; MinimumHeightDiffForNewLayer=0; NightInterceptionFraction=0; ReferenceHeight=2
      Zone paddock: Area=1; Slope=0; AspectAngle=0; Altitude=50
        SlopeEffectsOnWeather: same as LowerBCEffect.Experiment.Base.paddock.SlopeEffectsOnWeather
        Manager AutomaticIrrigation
          allowIrrigation = False
          seasonStart = 15-Aug
          seasonEnd = 30-May
          seasonsAllocation = 10000
          triggerDeficit = 50
          targetDeficit = 99
          returndays = 1
          maximumAmount = 30
          depthPAWC = 300
```csharp
using Newtonsoft.Json;
using Models.PMF.Phen;
using System;
using Models.Core;
using Models.PMF;
using Models.Soils;
using System.Xml.Serialization;
using APSIM.Shared.Utilities;
using Models.Interfaces;

        
namespace Models
{
    [Serializable] 
    [System.Xml.Serialization.XmlInclude(typeof(Model))]
    public class Script : Model
    {
        [Link] private ISummary summary;
        [Link] private Irrigation Irrigation;
        [Link] private Clock Clock;
        [Link] private Soil Soil;
        [Link(IsOptional = true)] private IPlant existingCrop;
        private DateTime StartDate;
        private DateTime EndDate;
        private double TopDUL;
        private double TopLL;
        private int nLayers;
        [Link(IsOptional = true)]
        private Phenology phenology;
        [Link]
        private IPhysical soilPhysical;
        [Link]
        private ISoilWater waterBalance;
        //Communication to other modules
       
        //User inputs from properties tab
        [Description("Turn irrigation on?")]
        public bool allowIrrigation { get; set; }
        [Description("Start of irrigation season (dd-MMM)")]
        public string seasonStart { get; set; }
        [Description("End of irrigation season (dd-MMM)")]
        public string seasonEnd { get; set; }
        [Description("Season allocation (mm)")]
        public double seasonsAllocation { get; set; }
        [Description("Deficit to trigger irrigation (% PAWC)")]
        public double triggerDeficit { get; set; }
        [Description("Deficit to stop irrigaton (% PAWC)")]
        public double targetDeficit { get; set; }
        [Description("Minimum days for irrigation to return")]
        public double returndays { get; set; }
        [Description("Maximum irrigation application (mm/day)")]
        public double maximumAmount { get; set; }
        [Description("Depth to calculate PAWC (mm)")]
        public double depthPAWC { get; set; }

        //Class members
        [JsonIgnore] public double TopSWdeficit { get; set; }
        [JsonIgnore] public double TopSWC { get; set; }
        [JsonIgnore] public double DaysSinceIrrigation { get; set; }
        [JsonIgnore] public double AmountToApply { get; set; }
        [JsonIgnore] public double SeasonAppliedAmount { get; set; }
        
        private bool IrrigationIsAllowed { get; set; }
        private bool SeasonIsOpen { get; set; }
        private bool CropIsActive { get; set; }
        private bool IrrigatorIsAvailable { get; set; }
        private bool SoilIsDry { get; set; }

    
        //Calculate static soil variables
        [EventSubscribe("StartOfSimulation")]
        private void OnStartOfSimulation(object sender, EventArgs e)
        {   
            //Set the season dates
            StartDate = DateTime.Parse(seasonStart + "-" + Clock.Today.Year.ToString());
            EndDate = DateTime.Parse(seasonEnd + "-" + Clock.Today.Year.ToString());
            
            //Can we irrigate at all?
            IrrigationIsAllowed = false; 
            if (allowIrrigation)
                IrrigationIsAllowed = true; 

            //Calculate soil water variables
            double depthFromSurface = 0.0;
            double fracLayer = 0.0;
            nLayers = soilPhysical.Thickness.Length;
            for (int layer = 0; layer < nLayers; layer++)
            {
                fracLayer = Math.Min(1.0, (depthPAWC - depthFromSurface) / soilPhysical.Thickness[layer]);
                TopLL += soilPhysical.LL15mm[layer] * fracLayer;
                TopDUL += soilPhysical.DULmm[layer] * fracLayer;
                depthFromSurface += soilPhysical.Thickness[layer];
                if (depthFromSurface >= depthPAWC)
                    layer = nLayers;
            }
        }
             
        //Determine daily requirement for irrigation
        [EventSubscribe("StartOfDay")]
        private void OnStartOfDay(object sender, EventArgs e)
        {
            //Can we irrigate today?          
            SeasonIsOpen = isBetween(Clock.Today, StartDate, EndDate);

            //Is there a crop in the ground that needs irrigation?
            CropIsActive = false;
            if ((existingCrop != null) && (existingCrop.IsAlive))
                CropIsActive = true;
            //if ((phenology.Stage >= 3.0) && (phenology.Stage < 6.0))
          
            //Is the irrigator available?
            IrrigatorIsAvailable = false;
            DaysSinceIrrigation += 1;
            if (DaysSinceIrrigation >= returndays)
                IrrigatorIsAvailable = true;
          
            //Is the soil dry enough to require irrigation?
            SoilIsDry = false;
            double depthFromSurface = 0.0;
            double fracLayer = 0.0;
            TopSWC = 0.0;
            for (int layer = 0; layer < nLayers; layer++)
            //for (int layer = 0; depthFromSurface < depthPAWC + soilPhysical.Thickness[layer]; layer++)
            {
                fracLayer = Math.Min(1.0, (depthPAWC - depthFromSurface) / soilPhysical.Thickness[layer]);
                TopSWC += waterBalance.SWmm[layer] * fracLayer;
                depthFromSurface += soilPhysical.Thickness[layer];
                if (depthFromSurface >= depthPAWC)
                    layer = nLayers;
            }
            
            TopSWdeficit = TopSWC - TopDUL;
            if (Math.Max(0.0, -TopSWdeficit) >= (TopDUL - TopLL) * (100 - triggerDeficit) / 100)
                SoilIsDry = true;
                
            //Are all the conditions ratifying irrigation
            if (IrrigationIsAllowed && SeasonIsOpen && CropIsActive && IrrigatorIsAvailable && SoilIsDry)
            {
                //Lets bloody well irrigate then!!!!
                AmountToApply = TopDUL * targetDeficit / 100 - TopSWC;
                AmountToApply = Math.Max(0.0, Math.Min(AmountToApply, seasonsAllocation - SeasonAppliedAmount));
                Irrigation.Apply(AmountToApply);
                DaysSinceIrrigation = 0;
                SeasonAppliedAmount += AmountToApply;
            }
        }
        
        ///Checks whether theDate is between iniDate and endDate (non-year specific)
        private bool isBetween(DateTime theDay, DateTime iniDate, DateTime endDate)
        {
            bool result = false;
            if (iniDate.DayOfYear < endDate.DayOfYear)
            {
                // period is within one year, ex: summer in the northern hemisphere
                if ((theDay.DayOfYear >= iniDate.DayOfYear) && (theDay.DayOfYear <= endDate.DayOfYear))
                    result = true;
            }
            else
            {
                // period goes over the end of the year, ex: summer in the southern hemisphere
                if ((theDay.DayOfYear >= iniDate.DayOfYear) || (theDay.DayOfYear <= endDate.DayOfYear))
                    result = true;
            }
            
            return result;
        }
    }
}
```
        Operations IrrigationSchedule
          2010-12-17  [Irrigation].Apply(100);
          2010-12-18  [Irrigation].Apply(100);
          2010-12-19  [Irrigation].Apply(100);
        Manager SetLowerBC
```csharp
using Models.Climate;
using APSIM.Shared.Utilities;
using Models.Soils.Nutrients;
using Models.Soils;
using Models.PMF;
using Models.Core;
using System.Xml.Serialization;
using System;
using Models.AgPasture;
using Models.Interfaces;

namespace Models
{
    [Serializable] 
    [System.Xml.Serialization.XmlInclude(typeof(Model))]
    public class Script : Model
    {
        [Link] Clock clock;
        [Link] ISummary summary;
        [Link] private Swim3 swim;
        //[Link] private PastureSpecies ryegrass;
        [Link] private SimpleGrazing grazing;

        public double SoilWaterStart  { get; set; }
        public double SoilWaterEnd  { get; set; }

        [EventSubscribe("DoDailyInitialisation")]
        private void DoDailyInitialisation(object sender, EventArgs e)
        {
        	SoilWaterStart = 0.0;
        	for (int i = 0; i < swim.SWmm.Length; i++)
        		SoilWaterStart += swim.SWmm[i];
		}

        [EventSubscribe("DoReportCalculations")]
        private void DoReportCalculations(object sender, EventArgs e)
        {
        	SoilWaterEnd = 0.0;
        	for (int i = 0; i < swim.SWmm.Length; i++)
        		SoilWaterEnd += swim.SWmm[i];
		}



        [EventSubscribe("DoManagement")]
        private void DoDailyCalculations(object sender, EventArgs e)
        {
        	if (clock.Today == clock.StartDate)
        	{
        		summary.WriteMessage(this, "setting bbc potential");
        		swim.bbc_seepage_potential = 0;
        		//grazing.GrazeToResidual(0.0);
        		//ryegrass.KillCrop(1.0);
        	}
        }
    }
}
```
        Soil: Latitude=0; Longitude=0
          Physical
            Thickness  ParticleSizeClay  ParticleSizeSand  ParticleSizeSilt  Rocks  BD     AirDry  LL15   DUL    SAT    KS
            60         17.61             33.77             48.62             0      0.865  0.077   0.231  0.565  0.58   216
            110        16.36             33.91             49.73             0      0.835  0.069   0.207  0.515  0.606  1188
            140        16.42             35.91             47.67             0      0.805  0.068   0.205  0.514  0.617  2160
            240        29.03             46.26             24.71             0      0.83   0.088   0.264  0.475  0.62   3528
            150        18.44             53.54             28.02             0      0.82   0.097   0.29   0.481  0.625  5376
            SoilCrop AgPRyegrassSoil: LL=[0.231, 0.207, 0.205, 0.264, 0.29]; KL=[0.1, 0.1, 0.1, 0.1, 0]; XF=[1, 1, 1, 1, 0]
          SoilNitrogen: same as Folder.OriginalConvertedBuckthought.SoilNitrogen
          Organic: FOMCNRatio=40
            Thickness  Carbon  SoilCNRatio  FBiom  FInert  FOM
            60         8.2     12.5         0.08   0.58    92.873
            110        5.5     12.5         0.02   0.7     57.963
            140        3.3     12.5         0.015  0.77    31.811
            240        1.7     12.5         0.01   0.9     11.373
            150        1.7     12.5         0.01   0.99    5.98
          Chemical
            Thickness  NO3N   NH4N   PH   CL
            60         6.503  0.599  5.7  10
            110        2.101  0.1    5.3  10
            140        2.101  0.1    5.9  10
            240        1.701  0.1    6.6  10
            150        1.701  0.1    6.7  10
          Sample Initial water: Thickness=[60, 110, 140, 240, 150]; SW=[0.58, 0.606, 0.617, 0.62, 0.625]; SWUnits=Volumetric; OCUnits=Total; PHUnits=Water
          CERESSoilTemperature Temperature
          Swim3: PrecipitationInterception=0; Salb=0.13; CN2Bare=0; CNRed=20; CNCov=0.8; KDul=0.1; PSIDul=-100; VC=true; DTMin=0; DTMax=30; MaxWaterIncrement=1; SpaceWeightingFactor=0; SoluteSpaceWeightingFactor=1; Dis=0; Disp=1; A=2; DTHC=0.1; DTHP=2; Diagnostics=true; WaterTable=0
            SwimSoluteParameters Urea: WaterTableConcentration=0; D0=0.05
              Thickness  Exco  FIP
              60         0     1
              110        0     1
              140        0     1
              240        0     1
              150        0     1
            SwimSoluteParameters NH4: WaterTableConcentration=0; D0=0.05
              Thickness  Exco  FIP
              60         1     1
              110        1     1
              140        1     1
              240        1     1
              150        1     1
            SwimSoluteParameters NO3: WaterTableConcentration=0; D0=0.05
              Thickness  Exco  FIP
              60         0     1
              110        0     1
              140        0     1
              240        0     1
              150        0     1
            SwimSoluteParameters CL: WaterTableConcentration=0; D0=0.05
              Thickness  Exco  FIP
              60         0     1
              110        0     1
              140        0     1
              240        0     1
              150        0     1
            SwimSoluteParameters PlantAvailableNH4: WaterTableConcentration=0; D0=0.05
              Thickness  Exco  FIP
              60         1     1
              110        1     1
              140        1     1
              240        1     1
              150        1     1
            SwimSoluteParameters PlantAvailableNO3: WaterTableConcentration=0; D0=0.05
              Thickness  Exco  FIP
              60         0     1
              110        0     1
              140        0     1
              240        0     1
              150        0     1
          Solute CL
          InitialWater Initial water: PercentMethod=0; FractionFull=1
          LayerStructure: Thickness=[10, 20, 30, 40, 50, 50, 50, 50, 100, 100, 50, 50, 50, 50]
        Irrigation
        Fertiliser
        SurfaceOrganicMatter: InitialResidueName=grass; InitialResidueType=grass; InitialResidueMass=20; InitialStandingFraction=0; InitialCPR=0; InitialCNR=17
        SimpleGrazing: GrazingRotationType=2; SimpleMinGrazable=0; SimpleGrazingResidual=0; FlexibleGrazePostDM=0; FractionDefoliatedNToSoil=[0]; CNRatioDung=0; DepthUrineIsAdded=0; FractionPopulationDecline=0; TramplingOn=false; MaximumPropLitterMovedToSoil=0.1; PastureConsumedAtMaximumRateOfLitterRemoval=1200
        PastureSpecies AGPRyegrass: InitialShootDM=1500; InitialRootDM=450; InitialRootDepth=200
        PastureSpecies AGPWhiteClover: InitialShootDM=500; InitialRootDM=150; InitialRootDepth=350
        Report: EventNames=[Clock].EndOfDay
          VariableNames:
            [Clock].Today as Date
            //[Soil].Swim3.psi
            //[Soil].Swim3.SW
            [Weather].Rain
            [Irrigation].IrrigationApplied
            [Soil].Swim3.Drainage
            [Soil].Swim3.Es
            [Soil].Swim3.Runoff
            //[AgPRyegrass].WaterUptake
            [SetLowerBC].Script.SoilWaterStart
            [SetLowerBC].Script.SoilWaterEnd
            /// Water balance
            [Weather].Rain + [Irrigation].IrrigationApplied as WaterAdded
            [Soil].Swim3.Drainage + [Soil].Swim3.Es + [Soil].Swim3.Runoff as WaterRemoved // don't forget to add in plant uptake
            ([SetLowerBC].Script.SoilWaterEnd - [SetLowerBC].Script.SoilWaterStart) as WaterStoredInc
            ([Weather].Rain + [Irrigation].IrrigationApplied) - ([Soil].Swim3.Drainage + [Soil].Swim3.Es + [Soil].Swim3.Runoff) - ([SetLowerBC].Script.SoilWaterEnd - [SetLowerBC].Script.SoilWaterStart) as SoilWaterBalance
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