Simulations: Version=155
  Folder Replacements
    Manager CalculateRollingWaterBalance
      WBTolerance = 0.1
```csharp
// This script calculates a *WaterBalance* term (output) that adds together the water balance
// water entering the system (e.g. rain, irrigation) and subtracts the water
// leaving the system (e.g. runoff, drainage, evaporation, plant water uptake). If mass balance
// is maintained, the *WaterBalance* variable should always be zero.   




using Models.Climate;
using APSIM.Shared.Utilities;
using Models.Soils.Nutrients;
using Models.Soils;
using Models.PMF;
using Models.Core;
using System.Xml.Serialization;
using System;
using Models.AgPasture;
using Models.Interfaces;
using System.Linq;

namespace Models
{
    [Serializable] 
    [System.Xml.Serialization.XmlInclude(typeof(Model))]
    public class Script : Model
    {
        [Link] Clock clock;
        [Link] ISummary summary;
        [Link] IWeather weather;
        [Link] Irrigation irrigation;
        [Link] private ISoilWater waterBalance;
        [Link] private IPlant[] plants;

  
  		[Separator("This manager checks that water in the simulation balances - that all inputs are accounted for as storage or losses. If the water balance exceeds (high or low) the tolerance then the simulation is crashed.")]
  		
  		[Description("What water mass balance error is tolerable in the cumulative water balance? (mm /year) (suggest substantially < 1 mm /year)")] public double WBTolerance { get; set; }
  		
  		
        public double WaterBalanceCumulative  { get; set; }
        public double WaterBalanceToday  { get; set; }

        public double SoilWaterAtInitialisation  { get; set; }
        public double SoilWaterYesterday  { get; set; }
		public double SoilWaterNow  { get; set; }

		public double PlantWaterUptake { get; set; }

        public double WaterAddedToday  { get; set; }
        public double WaterRemovedToday  { get; set; }
        public double WaterAddedCumulative  { get; set; }
        public double WaterRemovedCumulative  { get; set; }
        
        public double WBCheck { get; set; }
        

        [EventSubscribe("DoDailyInitialisation")]
        private void DoDailyInitialisation(object sender, EventArgs e)
        {
        	if (clock.Today == clock.StartDate) 
        	// capture the water in and on the soil as a starting point
        	// doing this here as need the models to have intialised first
        	{
	        	SoilWaterAtInitialisation = waterBalance.Pond;
    	    	for (int i = 0; i < waterBalance.SWmm.Length; i++)
        			SoilWaterAtInitialisation += waterBalance.SWmm[i];

        		SoilWaterYesterday = SoilWaterAtInitialisation;		
        		WaterAddedCumulative = 0.0;
        		WaterRemovedCumulative = 0.0;
        		SoilWaterNow = 0.0;
        	}
        	else
        	{
        		SoilWaterYesterday = SoilWaterNow;		// SoilWaterNow holds the value calculated at reporting yesterday
        		WaterAddedToday = 0.0;
        		WaterRemovedToday = 0.0;
        	}
		}

        [EventSubscribe("DoReportCalculations")]
        private void DoReportCalculations(object sender, EventArgs e)
        {
       	// All the WaterBalance variables should be zero. A positive value is a generation of water.
        	SoilWaterNow = waterBalance.Pond;
        	for (int i = 0; i < waterBalance.SWmm.Length; i++)
        		SoilWaterNow += waterBalance.SWmm[i]; // so all the water stored in or on the soil

        	WaterAddedToday = weather.Rain + irrigation.IrrigationApplied;   // Can there be runon? Probably not but this will throw an error if that ever happens
        	WaterAddedCumulative+= WaterAddedToday;

        	WaterRemovedToday = waterBalance.Drainage + waterBalance.Es + waterBalance.Runoff + waterBalance.SubsurfaceDrain;
        	PlantWaterUptake = 0.0;
        	foreach (var plant in plants)
        	{
        		if (plant.WaterUptake != null)
        			PlantWaterUptake += plant.WaterUptake.Sum();
        	}

        	WaterRemovedToday += PlantWaterUptake;

        	WaterRemovedCumulative += WaterRemovedToday;

        	WaterBalanceToday = WaterAddedToday - WaterRemovedToday - (SoilWaterNow - SoilWaterYesterday);
        	WaterBalanceCumulative = WaterAddedCumulative - WaterRemovedCumulative - (SoilWaterNow - SoilWaterAtInitialisation);

        	// need to add a warning value and a crash value and make a crash
        	double simTimeYears = (clock.Today - clock.StartDate).Days/365.25;
        	if (simTimeYears > 0.1)
        	{
        		WBCheck = WaterBalanceCumulative * simTimeYears;
        		if (WBCheck > WBTolerance * simTimeYears)
        			throw new Exception("The error in the water balance, " + WaterBalanceCumulative + ", exceeded the specified tolerance of " + WBTolerance * simTimeYears + ". There is likely a problem with SWIM or SoilWater.");
        	}
		}
    }
}
```
  DataStore
    ExcelInput: FileNames=[HudsonObserved.xlsx]
      SheetNames=[ObservedCrop, ObservedPhenology, ObservedCl, ObservedResidue, ObservedRunoff, Stubble, ObservedSW, ObservedSWlayers]
    ExcelInput ExcelInput1
      FileNames=[_measured_FACTS_Kelley_NG.xlsx, _measured_TileDrainageSpace_NG.xlsx, _measured_WaterTable_NG.xlsx]
      SheetNames=[Crop, Water, Nitrogen, Classic, Tile, SurfaceOM, DrainSpace, Classic, WT_obs, WT_classic]
    ExcelInput ExcelInput2: FileNames=[BuckthoughtObserved.xlsx]; SheetNames=[ObservedDrainage, ObservedHerbage]
    PredictedObserved (disabled): PredictedTableName=OutputfileUSA3; ObservedTableName=WT_obs; FieldNameUsedForMatch=Clock.Today; AllColumns=true
    PredictedObserved PredictedObservedClassic (disabled): PredictedTableName=WT_classic; ObservedTableName=WT_obs; FieldNameUsedForMatch=Clock.Today; AllColumns=true
  Folder Validation
    Folder Tile DrainageSpacing
      Memo
        # Things to look at:
        - in your original version you were setting drain spacing in m instead of mm - I have corrected that
        - there is hardly any tile drainage but I am not surprised because the soil properties have it with a high conductivity (~70 mm /day)  at 1200 mm deep (the depth to the impermeable layer that was set). So I would say the results are consistent with the way the soil is set up. Can you look at this please?

        NW Indiana long-term experiment (est 1980) with different subsurface drainage spacing (5m, 10m, 20m, and 40m). Crops were corn, soybean and rye cover crop. Exp data collected from 2-replications. Large plot size.

        ### Status of the sim (May 2022) - SVA notes:
        1. Weather comes a local station (on site) and public data, synthetic file.
        2. Soil profile is identical to the one used in classic
        3. Management is 95% final (need to double check and verfiy as we noticed some errors in the conversion from classic to NG)
        4. Cultivars: we used a fixed corn and a fixed soy cultivar for all years, we have not yet converted all the cultivars from classic to NG
        5. Additional measured data to be added (work in progress)

        ### Relevant publications
        1. Pasley et al., 2021 (Env Res Letters) https://iopscience.iop.org/article/10.1088/1748-9326/abef8f
        2. Kladivko et al., 2004 (J of Envirn Quality) https://acsess.onlinelibrary.wiley.com/doi/abs/10.2134/jeq2004.1803
      Experiment Drain
        Factors Drain
          Factor Space
            Specification=[SWIM].SwimSubsurfaceDrain.DrainSpacing = 5000, 10000, 20000, 40000
        Simulation Base
          Clock: Start=1987-01-01; End=1999-12-31
          Weather: FileName=00_SEPAC_1968_2000.met
          Summary summaryfile
          SoilArbitrator
          MicroClimate: a_interception=0; b_interception=1; c_interception=0; d_interception=0; SoilHeatFluxFraction=0.4; MinimumHeightDiffForNewLayer=0; NightInterceptionFraction=0.5; ReferenceHeight=2
          Zone paddock: Area=1; Slope=0; AspectAngle=0; Altitude=50
            Manager SWIMSetLowerBC
              LowerBCType = potential
              LowerBCValue = 1200
```csharp
using Models.Climate;
using APSIM.Shared.Utilities;
using Models.Soils.Nutrients;
using Models.Soils;
using Models.PMF;
using Models.Core;
using System.Xml.Serialization;
using System;
using Models.AgPasture;
using Models.Interfaces;

namespace Models
{
    [Serializable] 
    [System.Xml.Serialization.XmlInclude(typeof(Model))]
    public class Script : Model
    {
        [Link] Clock clock;
        [Link] ISummary summary;
        [Link] private Swim3 swim;
        
        public enum LowerBCTypeOptions {gradient,seepage,potential};

        [Separator("Sets the lower boundary condition type (and value if set to 'potential' for SWIM3. The change is applied at the beginning of the first day of the simulation.")]
        [Description("What lower boundary condition is wanted?")] 
        public LowerBCTypeOptions LowerBCType { get; set; }
        
        [Description("If 'potential', then what potential? Should be negative (mm) ")]
        [Display(EnabledCallback = "IsPotential")] 
        public double LowerBCValue { get; set; }
        
        /// <summary></summary>
        public bool IsPotential => LowerBCType == LowerBCTypeOptions.potential;
        

        public double SoilWaterStart  { get; set; }
        public double SoilWaterEnd  { get; set; }

        [EventSubscribe("DoManagement")]
        private void DoDailyCalculations(object sender, EventArgs e)
        {
            if (clock.Today == clock.StartDate)
            {
                summary.WriteMessage(this, "Script is setting lower boundary condition to " + LowerBCType, MessageType.Diagnostic);
                if (LowerBCType == LowerBCTypeOptions.gradient)
                    swim.SetLowerBCForGradient(bbcGradient: 0.0);   // in cm/cm (ibbc=0) Note that this is the default setting
                else if (LowerBCType == LowerBCTypeOptions.potential)
                    swim.SetLowerBCForGivenPotential(bbcPotential: LowerBCValue /10.0 );    //  convert to cm (ibbc=1), DUL is -100 cm so values more positive will often result in inflow to the bottom of the soil profile. Input in mm so divide here.
                else if (LowerBCType == LowerBCTypeOptions.seepage)
                    swim.SetLowerBCForSeepage(bbcPotentialSeepage: 0.0);  // in cm (ibbc=3). This is for zero-tension lysimeters
                else
                    throw new Exception("Wrong lower boundary condition type");
            }
        }
    }
}
```
            Manager N Deposition
              ppm = 0.0156
              varname = N_deposition
              fertmodule = fertiliser
```csharp
using Models.Soils;
using System;
using Models.Core;
using Models.PMF;
namespace Models
{
    [Serializable]
    [System.Xml.Serialization.XmlInclude(typeof(Model))]
    public class Script : Model
    {
        [Link] Clock Clock;

        [Description("What to multiply rain by?")]
        public string ppm { get; set; }

        [Description("Name of the NO3_N deposition variable as seen by the model")]
        public string varname { get; set; }

        [Description("Name of module that applies nitrogen")]
        public string fertmodule { get; set; }

        [EventSubscribe("DoManagement")]
        private void OnDoManagement(object sender, EventArgs e)
        {
            /*
                
         
            [varname] = rain * [ppm]
            N_deposition_tot = N_deposition_tot + [varname]
            if (rain > 0) then
               [fertmodule] apply amount = [varname](kg/ha), depth = 0 (mm), type = NO3_N ()
            endif
      
            */
        }
    }
}
```
            Fertiliser
            Irrigation
            SurfaceOrganicMatter: InitialResidueName=maize; InitialResidueType=maize; InitialResidueMass=2800; InitialStandingFraction=0; InitialCPR=0; InitialCNR=72
            Soil: SoilType=AME_Webster_L107; Region=AME_Webster_L107; State=IL; Country=USA; ApsoilNumber=1; Latitude=0; Longitude=0; DataSource=ssurgo2apsim; Comments=None
              Physical
                Thickness  ParticleSizeClay  ParticleSizeSand  BD    AirDry  LL15   DUL    SAT    KS
                50         12.2              22                1.42  0.044   0.087  0.276  0.431  300.741
                50         12.2              22                1.42  0.043   0.087  0.275  0.428  289.832
                50         12.2              22                1.42  0.043   0.086  0.274  0.424  278.007
                150        12.2              22                1.42  0.085   0.085  0.273  0.42   266.49
                150        15.6              20                1.53  0.103   0.103  0.287  0.417  177.098
                150        19                17.7              1.53  0.121   0.121  0.303  0.419  122.923
                200        19                17.7              1.53  0.12    0.12   0.3    0.41   104.52
                200        25.8              16.8              1.53  0.158   0.158  0.327  0.4    69.193
                200        25.8              16.8              1.53  0.158   0.158  0.327  0.39   69.193
                300        25.8              16.8              1.53  0.158   0.158  0.327  0.38   68.424
                300        25.8              16.8              1.53  0.157   0.157  0.327  0.37   21.77
                300        25.8              16.8              1.53  0.157   0.157  0.327  0.36   17.824
                300        25.8              16.8              1.53  0.157   0.157  0.327  0.35   14.593
                300        25.8              16.8              1.53  0.157   0.157  0.327  0.35   11.948
                300        25.8              16.8              1.53  0.157   0.157  0.327  0.34   9.782
                300        25.8              16.8              1.64  0.157   0.157  0.327  0.34   8.009
                300        25.8              16.8              1.64  0.157   0.157  0.327  0.34   6.557
                300        25.8              16.8              1.64  0.157   0.157  0.327  0.34   5.368
                SoilCrop MaizeSoil
                  LL=[0.087, 0.087, 0.086, 0.085, 0.151, 0.185, 0.2, 0.25, 0.265, 0.28, 0.294, 0.305, 0.314, 0.315, 0.315, 0.315, 0.315, 0.315]
                  KL=[0.08, 0.08, 0.08, 0.08, 0.08, 0.08, 0.08, 0.08, 0.08, 0.042, 0.035, 0.028, 0.022, 0.016, 0.011, 0.007, 0.003, 0.001]
                  XF=[1, 1, 1, 1, 1, 1, 1, 1, 1, 0.1, 0, 0, 0, 0, 0, 0, 0, 0]
                SoilCrop SoybeanSoil
                  LL=[0.087, 0.087, 0.086, 0.085, 0.151, 0.185, 0.2, 0.25, 0.265, 0.28, 0.294, 0.305, 0.314, 0.315, 0.315, 0.315, 0.315, 0.315]
                  KL=[0.08, 0.08, 0.08, 0.08, 0.08, 0.08, 0.08, 0.08, 0.08, 0.04, 0.04, 0.03, 0.02, 0.02, 0.01, 0.01, 0, 0]
                  XF=[1, 1, 1, 1, 1, 1, 1, 1, 1, 0.1, 0, 0, 0, 0, 0, 0, 0, 0]
                SoilCrop WheatSoil
                  LL=[0.087, 0.087, 0.086, 0.085, 0.151, 0.185, 0.2, 0.25, 0.265, 0.28, 0.294, 0.305, 0.314, 0.315, 0.315, 0.315, 0.315, 0.315]
                  KL=[0.08, 0.08, 0.08, 0.08, 0.08, 0.08, 0.08, 0.08, 0.08, 0.04, 0.04, 0.03, 0.02, 0.02, 0.01, 0.01, 0, 0]
                  XF=[1, 1, 1, 1, 1, 1, 1, 1, 1, 1, 0.1, 0, 0, 0, 0, 0, 0, 0]
              Swim3 Swim: PrecipitationInterception=0; ersoil=1e-06; ernode=1e-06; slcerr=1e-06; Salb=0.15; CN2Bare=70; CNRed=20; CNCov=0.8; KDul=0.25; PSIDul=-250; VC=true; DTMin=0; DTMax=1440; MaxWaterIncrement=10; SpaceWeightingFactor=0; SoluteSpaceWeightingFactor=0; Dis=15; Disp=0.65; A=1; DTHC=0; DTHP=1; Diagnostics=false; WaterTable=0
                SwimSubsurfaceDrain: DrainDepth=750; DrainSpacing=5000; DrainRadius=100; Klat=250; ImpermDepth=1200
              CERESSoilTemperature Temperature
              Organic: FOMCNRatio=45; CarbonUnits=Total
                Thickness  Carbon  SoilCNRatio  FBiom  FInert    FOM
                50         1.6125  13           0.25   0.365     125.774
                50         1.5     13           0.22   0.365     121.028
                50         1.375   13           0.2    0.365     116.462
                150        1.25    13           0.17   0.67925   103.77
                150        0.875   13           0.12   0.69875   92.4616
                150        0.625   13           0.1    0.71825   82.3855
                200        0.25    13           0.05   0.741     70.6376
                200        0.1     13           0.04   0.767     60.565
                200        0.1     13           0.019  0.96831   51.9287
                300        0.08    13           0.016  0.983835  41.2273
                300        0.01    13           0.014  0.999     32.7313
                300        0.01    13           0.013  0.999     25.9861
                300        0       13           0.012  0.999     20.631
                300        0       13           0.011  0.999     16.3794
                300        0       13           0.01   0.999     13.004
                300        0       13           0.009  0.999     10.3242
                300        0       13           0.009  0.999     8.19658
                300        0       13           0.008  0.999     6.50745
              Chemical: PHUnits=Water
                Thickness=[50, 50, 50, 150, 150, 150, 200, 200, 200, 300, 300, 300, 300, 300, 300, 300, 300, 300]
                PH=[5.7, 5.7, 5.7, 5.7, 4.5, 4.4, 4.4, 4.4, 4.4, 4.4, 4.4, 4.4, 4.4, 4.4, 4.4, 4.4, 4.4, 4.4]
              Water: RelativeTo=LL15; FilledFromTop=false
                Thickness=[50, 50, 50, 150, 150, 150, 200, 200, 200, 300, 300, 300, 300, 300, 300, 300, 300, 300]
                InitialValues=[0.276, 0.275, 0.274, 0.273, 0.287, 0.303, 0.3, 0.327, 0.327, 0.327, 0.327, 0.327, 0.327, 0.327, 0.327, 0.327, 0.327, 0.327]
              Nutrient
              Solute NO3: InitialValuesUnits=ppm; WaterTableConcentration=0; D0=0.05; Exco=[0, 0, 0, 0, 0, 0, 0, 0, 0, 0, 0, 0, 0, 0, 0, 0]; FIP=[1, 1, 1, 1, 1, 1, 1, 1, 1, 1, 1, 1, 1, 1, 1, 1]
                Thickness=[50, 50, 50, 150, 150, 150, 200, 200, 200, 300, 300, 300, 300, 300, 300, 300, 300, 300]
                InitialValues=[9.85915, 9.85915, 9.85915, 2.8169, 2.42424, 2.40964, 3, 4, 5, 5, 1.21951, 1.21951, 1.62602, 1.21951, 1.21951, 0.609756, 0.406504, 0.203252]
              Solute NH4: InitialValuesUnits=ppm; WaterTableConcentration=0; D0=0.05; Exco=[1, 1, 1, 1, 1, 1, 1, 1, 1, 1, 1, 1, 1, 1, 1, 1]; FIP=[1, 1, 1, 1, 1, 1, 1, 1, 1, 1, 1, 1, 1, 1, 1, 1]
                Thickness=[50, 50, 50, 150, 150, 150, 200, 200, 200, 300, 300, 300, 300, 300, 300, 300, 300, 300]
                InitialValues=[9.85915, 9.85915, 9.85915, 2.8169, 2.42424, 2.40964, 3, 4, 5, 5, 1.21951, 1.21951, 1.62602, 1.21951, 1.21951, 0.609756, 0.406504, 0.203252]
              Solute Urea: InitialValues=[0, 0, 0, 0, 0, 0, 0, 0, 0, 0, 0, 0, 0, 0, 0, 0, 0, 0]; InitialValuesUnits=kg/ha; WaterTableConcentration=0; D0=0.05; Exco=[0, 0, 0, 0, 0, 0, 0, 0, 0, 0, 0, 0, 0, 0, 0, 0]; FIP=[1, 1, 1, 1, 1, 1, 1, 1, 1, 1, 1, 1, 1, 1, 1, 1]
                Thickness=[50, 50, 50, 150, 150, 150, 200, 200, 200, 300, 300, 300, 300, 300, 300, 300, 300, 300]
            Operations Mgt
              1984-03-10  [Fertiliser].Apply(285, Fertiliser.Types.NH4N, 300)
              1984-05-10  [SurfaceOrganicMatter].Incorporate(fraction:0.5, depth:250)
              1984-05-21  [Maize].Sow(cultivar: Laila, population: 6, depth: 50, rowSpacing:750)
              1984-05-21  [Fertiliser].Apply(18, Fertiliser.Types.NH4N, 10)
              1984-05-21  [SurfaceOrganicMatter].Incorporate(fraction:0.1, depth:250)
              1984-10-30  [Maize].Harvest()
              1984-10-30  [Maize].EndCrop()
              1985-03-10  [Fertiliser].Apply(285, Fertiliser.Types.NH4N, 300)
              1985-04-10  [SurfaceOrganicMatter].Incorporate(fraction:0.5, depth:250)
              1985-04-22  [Maize].Sow(cultivar: Laila, population: 6, depth: 50, rowSpacing:750)
              1985-04-22  [Fertiliser].Apply(8, Fertiliser.Types.NH4N, 10)
              1985-04-22  [SurfaceOrganicMatter].Incorporate(fraction:0.1, depth:250)
              1985-09-23  [Maize].Harvest()
              1985-09-23  [Maize].EndCrop()
              1986-03-20  [Fertiliser].Apply(285, Fertiliser.Types.NH4N, 300)
              1986-04-20  [SurfaceOrganicMatter].Incorporate(fraction:0.5, depth:250)
              1986-04-30  [Maize].Sow(cultivar: Laila, population: 6, depth: 50, rowSpacing:750)
              1986-04-30  [Fertiliser].Apply(21, Fertiliser.Types.NH4N, 10)
              1986-04-30  [SurfaceOrganicMatter].Incorporate(fraction:0.1, depth:250)
              1986-09-23  [Maize].Harvest()
              1986-09-23  [Maize].EndCrop()
              1987-03-20  [Fertiliser].Apply(285, Fertiliser.Types.NH4N, 300)
              1987-04-27  [SurfaceOrganicMatter].Incorporate(fraction:0.5, depth:250)
              1987-04-28  [Maize].Sow(cultivar: Laila, population: 6, depth: 50, rowSpacing:750)
              1987-04-28  [Fertiliser].Apply(22, Fertiliser.Types.NH4N, 10)
              1987-04-28  [SurfaceOrganicMatter].Incorporate(fraction:0.5, depth:250)
              1987-09-15  [Maize].Harvest()
              1987-09-15  [Maize].EndCrop()
              1988-03-20  [Fertiliser].Apply(285, Fertiliser.Types.NH4N, 300)
              1988-05-01  [SurfaceOrganicMatter].Incorporate(fraction:0.5, depth:250)
              1988-05-02  [Maize].Sow(cultivar: Laila, population: 6, depth: 50, rowSpacing:750)
              1988-05-02  [Fertiliser].Apply(11, Fertiliser.Types.NH4N, 10)
              1988-05-02  [SurfaceOrganicMatter].Incorporate(fraction:0.1, depth:250)
              1988-10-03  [Maize].Harvest()
              1988-10-03  [Maize].EndCrop()
              1989-03-10  [Fertiliser].Apply(228, Fertiliser.Types.NH4N, 300)
              1989-05-17  [SurfaceOrganicMatter].Incorporate(fraction:0.5, depth:250)
              1989-05-18  [Maize].Sow(cultivar: Laila, population: 6, depth: 50, rowSpacing:750)
              1989-05-18  [Fertiliser].Apply(20, Fertiliser.Types.NH4N, 10)
              1989-05-18  [SurfaceOrganicMatter].Incorporate(fraction:0.1, depth:250)
              1989-10-12  [Maize].Harvest()
              1989-10-12  [Maize].EndCrop()
              1990-03-10  [Fertiliser].Apply(228, Fertiliser.Types.NH4N, 300)
              1990-05-28  [SurfaceOrganicMatter].Incorporate(fraction:0.5, depth:250)
              1990-05-29  [Maize].Sow(cultivar: Laila, population: 6, depth: 50, rowSpacing:750)
              1990-05-29  [Fertiliser].Apply(28, Fertiliser.Types.NH4N, 10)
              1990-05-29  [SurfaceOrganicMatter].Incorporate(fraction:0.1, depth:250)
              1990-10-29  [Maize].Harvest()
              1990-10-29  [Maize].EndCrop()
              1991-04-20  [Fertiliser].Apply(228, Fertiliser.Types.NH4N, 10)
              1991-04-30  [SurfaceOrganicMatter].Incorporate(fraction:0.5, depth:250)
              1991-05-01  [Maize].Sow(cultivar: Laila, population: 6, depth: 50, rowSpacing:750)
              1991-05-01  [Fertiliser].Apply(28, Fertiliser.Types.NH4N, 10)
              1991-05-01  [SurfaceOrganicMatter].Incorporate(fraction:0.1, depth:250)
              1991-09-17  [Maize].Harvest()
              1991-09-17  [Maize].EndCrop()
              1992-04-20  [Fertiliser].Apply(228, Fertiliser.Types.NH4N, 10)
              1992-04-05  [SurfaceOrganicMatter].Incorporate(fraction:0.5, depth:250)
              1992-05-05  [Maize].Sow(cultivar: Laila, population: 6, depth: 50, rowSpacing:750)
              1992-05-05  [Fertiliser].Apply(28, Fertiliser.Types.NH4N, 10)
              1992-05-05  [SurfaceOrganicMatter].Incorporate(fraction:0.1, depth:250)
              1992-10-05  [Maize].Harvest()
              1992-10-05  [Maize].EndCrop()
              1993-05-01  [Fertiliser].Apply(228, Fertiliser.Types.NH4N, 10)
              1993-05-09  [SurfaceOrganicMatter].Incorporate(fraction:0.5, depth:250)
              1993-05-10  [Maize].Sow(cultivar: Laila, population: 6, depth: 50, rowSpacing:750)
              1993-05-10  [Fertiliser].Apply(28, Fertiliser.Types.NH4N, 10)
              1993-05-10  [SurfaceOrganicMatter].Incorporate(fraction:0.1, depth:250)
              1993-10-13  [Maize].Harvest()
              1993-10-13  [Maize].EndCrop()
              1994-05-20  [Soybean].Sow(cultivar: Generic_MG2, population: 30, depth: 50, rowSpacing:750)
              1994-10-04  [Soybean].Harvest()
              1994-10-04  [Soybean].EndCrop()
              1995-04-06  [Fertiliser].Apply(196, Fertiliser.Types.NH4N, 200)
              1995-06-08  [Maize].Sow(cultivar: Laila, population: 6, depth: 50, rowSpacing:750)
              1995-06-08  [Fertiliser].Apply(25.08, Fertiliser.Types.UreaN, 200)
              1995-10-16  [Maize].Harvest()
              1995-10-16  [Maize].EndCrop()
              1995-10-16  [Wheat].Sow(cultivar: Yecora, population: 300, depth: 20, rowSpacing:203)
              1996-05-27  [Soybean].Sow(cultivar: Generic_MG2, population: 30, depth: 50, rowSpacing:750)
              1996-06-01  [Wheat].EndCrop()
              1996-10-25  [Soybean].Harvest()
              1996-10-25  [Soybean].EndCrop()
              1997-04-26  [Fertiliser].Apply(173.6, Fertiliser.Types.NH4N, 200)
              1997-04-29  [Maize].Sow(cultivar: Laila, population: 6, depth: 50, rowSpacing:750)
              1997-04-29  [Fertiliser].Apply(25.08, Fertiliser.Types.UreaN, 200)
              1997-11-10  [Maize].Harvest()
              1997-11-10  [Maize].EndCrop()
              1997-11-10  [Wheat].Sow(cultivar: Yecora, population: 300, depth: 20, rowSpacing:203)
              1998-04-23  [Wheat].EndCrop()
              1998-06-01  [Soybean].Sow(cultivar: Generic_MG2, population: 30, depth: 50, rowSpacing:750)
              1998-10-27  [Soybean].Harvest()
              1998-10-27  [Soybean].EndCrop()
              1999-04-28  [Fertiliser].Apply(173.6, Fertiliser.Types.NH4N, 200)
              1999-03-05  [Maize].Sow(cultivar: Laila, population: 6, depth: 50, rowSpacing:750)
              1999-03-05  [Fertiliser].Apply(25.08, Fertiliser.Types.UreaN, 200)
              1999-09-30  [Maize].Harvest()
              1999-09-30  [Maize].EndCrop()
            Plant maize: ResourceName=Maize
            Plant soybean: ResourceName=Soybean
            Plant wheat: ResourceName=Wheat
            Report OutputfileDaily: EventNames=[Clock].EndOfDay
              VariableNames:
                [Clock].Today
                ([Maize].AboveGround.Wt + [Soybean].AboveGround.Wt + [Wheat].AboveGround.Wt)*10 as CropBiomass
                ([Maize].Grain.Wt + [Soybean].Grain.Wt + [Wheat].Grain.Wt)*10 as CropYield
                [SurfaceOrganicMatter].Wt
                [SWIM].WaterTable
                [SWIM].SubsurfaceDrain
                [SWIM].SubsurfaceDrainNO3
                [SWIM].SW[6] as SW_50cm
                [SWIM].SW[8] as SW_110cm
                [SWIM].Drainage
                sum([Soil].NO3.kgha[1:4]) as NO3_030cm
                Sum of [SWIM].SubsurfaceDrain from 1-Jan to 31-Dec as Annual_tile_drainage
                Sum of [SWIM].SubsurfaceDrainNO3 from 1-Jan to 31-Dec as Annual_tile_drainage_no3
                Mean of [SWIM].WaterTable from 1-Jan to 31-Dec as Annual_WaterTable
                Max of ([Maize].AboveGround.Wt + [Soybean].AboveGround.Wt + [Wheat].AboveGround.Wt)*10 as CropBiomass2
                Max of ([Maize].Grain.Wt + [Soybean].Grain.Wt + [Wheat].Grain.Wt)*10 as CropYield2
            Report OutputfileAnnual: EventNames=[Clock].EndOfYear
              VariableNames:
                [Clock].Today
                ([Maize].AboveGround.Wt + [Soybean].AboveGround.Wt + [Wheat].AboveGround.Wt)*10 as CropBiomass
                ([Maize].Grain.Wt + [Soybean].Grain.Wt + [Wheat].Grain.Wt)*10 as CropYield
                [SurfaceOrganicMatter].Wt
                [SWIM].WaterTable
                [SWIM].SubsurfaceDrain
                [SWIM].SubsurfaceDrainNO3
                [SWIM].SW[6] as SW_50cm
                [SWIM].SW[8] as SW_110cm
                [SWIM].Drainage
                sum([Soil].NO3.kgha[1:4]) as NO3_030cm
                Sum of [SWIM].SubsurfaceDrain from 1-Jan to 31-Dec as Annual_tile_drainage
                Sum of [SWIM].SubsurfaceDrainNO3 from 1-Jan to 31-Dec as Annual_tile_drainage_no3
                Mean of [SWIM].WaterTable from 1-Jan to 31-Dec as Annual_WaterTable
                Max of ([Maize].AboveGround.Wt + [Soybean].AboveGround.Wt + [Wheat].AboveGround.Wt)*10 as CropBiomass2
                Max of ([Maize].Grain.Wt + [Soybean].Grain.Wt + [Wheat].Grain.Wt)*10 as CropYield2
    Folder WaterTable
      Memo
        # Things to look at:

        -	In both simulations, the original value that the water potential lower boundary was set at did not make sense. Were you trying to set it as the depth below the surface that the water table is at? It should be the water table depth relative to the base of the soil profile with positive values being inflow and negative outflow. Have tried to guess what it should be but needs your attention. See “HowToSetAPotentialLowerBoundaryCondition” for more information
        -	In the Stelle simulation it fails. This might be because of the coarse layering around the water table depth. Suggest adding a layering component (actually these should be used in all sims with SWIM) to try and address this.

        long term WT measurements from permanent wells (grass crop with reqular cuts, unknown mgt). Because we couldn't get the bambatsi to work, we used a maize model to keep it going

        ### Status of the sim (May 2022) - SVA notes:
        1. Weather data come from local + public sources (synthetic file).
        2. Soil profile from ssurgo
        3. Management and crop is our best assumption
        4. Similar data from other locations to be added (work in progress)
        5. most important - replace crop.

        ### Relevant publications
        1. Archontoulis et al., in-prep
      Simulation IA_Kanawha
        Weather: FileName=IA_Kanawaha.July5.2020.met
        Clock: Start=1984-01-01; End=2018-12-31
        Summary summaryfile
        SoilArbitrator
        MicroClimate: a_interception=0; b_interception=1; c_interception=0; d_interception=0; SoilHeatFluxFraction=0.4; MinimumHeightDiffForNewLayer=0; NightInterceptionFraction=0.5; ReferenceHeight=2
        Zone paddock: Area=1; Slope=0; AspectAngle=0; Altitude=50
          Manager SWIMSetLowerBC
            LowerBCType = potential
            LowerBCValue = 1300
            script: same as in Validation.Tile DrainageSpacing.Drain.Base.paddock.SWIMSetLowerBC
          Manager SowMaize
            Crop = [maize]
            SowDate = 1-may
            CultivarName = Laila
            SowingDepth = 50
            RowSpacing = 750
            Population = 6
```csharp
using APSIM.Shared.Utilities;
using Models.Utilities;
using Models.Soils;
using Models.PMF;
using Models.Core;
using System;

namespace Models
{
    [Serializable]
    public class Script : Model
    {
        [Link] Clock Clock;
        [Link] Fertiliser Fertiliser;
        [Link] Summary Summary;
        [Link] Soil Soil;
        
        [Description("Crop")]
        public IPlant Crop { get; set; }

        [Description("Sowing date (d-mmm)")]
        public string SowDate { get; set; }

        [Display(Type = DisplayType.CultivarName)]
        [Description("Cultivar to be sown")]
        public string CultivarName { get; set; }

        [Description("Sowing depth (mm)")]
        public double SowingDepth { get; set; }

        [Description("Row spacing (mm)")]
        public double RowSpacing { get; set; }

        [Description("Plant population (/m2)")]
        public double Population { get; set; }

        [EventSubscribe("DoManagement")]
        private void OnDoManagement(object sender, EventArgs e)
        {
            if (DateUtilities.WithinDates(SowDate, Clock.Today, SowDate))
            {
                Crop.Sow(population: Population, cultivar: CultivarName, depth: SowingDepth, rowSpacing: RowSpacing);    
            }
        }
    }
}
```
          Manager FertiliseMaize
            FertiliserType = NO3N
            FertiliserDates = 24-apr
            Amount = 160
            AmountType = True
```csharp
using Models.Soils;
using System;
using Models.Core;
using Models.PMF;
using APSIM.Shared.Utilities;
namespace Models
{
    [Serializable]
    public class Script : Model
    {
        [Link] Clock Clock;
        [Link] Fertiliser Fertiliser;
        
        [Separator("A component to apply fertiliser on one or more dates on every year of the simulation")]

        [Description("Type of fertiliser to apply? ")] 
        public Fertiliser.Types FertiliserType { get; set; }

        [Description("Enter the fertilisation dates as dd-mmm with comma separation (any year information entered will be ignored): ")] 
        public string[] FertiliserDates { get; set; } 

        [Description("Amount of fertiliser to be applied (kg /ha)")] 
        public double Amount { get; set; }

        [Description("Is the above amount to be applied each time? (yes/ticked)? Or is it the total annual amount across all dates (no/unticked)")] 
        public bool AmountType { get; set; }
        
        [EventSubscribe("DoManagement")]
        private void OnDoManagement(object sender, EventArgs e)
        {
            foreach (string ddMMM in FertiliserDates)
            {
                if (DateUtilities.DatesEqual(ddMMM, Clock.Today))
                {
                    if (AmountType)
                        Fertiliser.Apply(Amount: Amount, Type: FertiliserType);
                    else
                        Fertiliser.Apply(Amount: Amount / FertiliserDates.Length, Type: FertiliserType);
                }
            }
        }
    }
}
```
          Manager Harvesting
            Crop = [maize]
```csharp
using APSIM.Shared.Utilities;
using Models.Utilities;
using Models.Soils;
using Models.PMF;
using Models.Core;
using System;

namespace Models
{
    [Serializable] 
    public class Script : Model
    {
        [Description("Crop")]
        public IPlant Crop { get; set; }
        
        [EventSubscribe("DoManagement")]
        private void OnDoManagement(object sender, EventArgs e)
        {
            if (Crop.IsReadyForHarvesting)
            {
                Crop.Harvest();
                Crop.EndCrop();
            }
        }
    }
}
```
          Manager Tillage on a fixed date
            TillageDate = 1-dec
            Fraction = 0.5
            Depth = 0
```csharp
using Models.Soils;
using System;
using Models.Core;
using Models.PMF;
using APSIM.Shared.Utilities;
using Models.Surface;

namespace Models
{
    [Serializable]
    public class Script : Model
    {
        [Link] Clock Clock;
        [Link] SurfaceOrganicMatter SOM;
        
        [Description("Tillage Date")]
        public string TillageDate { get; set; }
        
        [Description("Fraction of Residues To Incorporate (0-1)")]
        public double Fraction { get; set; }

        [Description("Depth of Tillage (mm)")]
        public double Depth { get; set; }

        [EventSubscribe("DoManagement")]
        private void OnDoManagement(object sender, EventArgs e)
        {
            if (DateUtilities.WithinDates(TillageDate, Clock.Today, TillageDate))
                SOM.Incorporate(Fraction, Depth);
        }
    }
}
```
          Fertiliser
          SurfaceOrganicMatter: InitialResidueName=maize; InitialResidueType=maize; InitialResidueMass=1000; InitialStandingFraction=0; InitialCPR=0; InitialCNR=80
          Soil: SoilType=KRF_Webster_107; Region=KRF_Webster_107; State=IL; Country=USA; ApsoilNumber=1; Latitude=0; Longitude=0; DataSource=ssurgo2apsim; Comments=None
            Physical
              Thickness  ParticleSizeClay  ParticleSizeSand  ParticleSizeSilt  BD    AirDry  LL15  DUL   SAT    KS
              50         33                25                42                1.05  0.18    0.2   0.32  0.45   374.291
              50         33                25                42                1.05  0.18    0.2   0.32  0.45   408.155
              50         33                25                42                1.06  0.18    0.2   0.32  0.45   402.284
              150        33                25                42                1.17  0.2     0.21  0.33  0.45   342.607
              150        33                25                42                1.33  0.23    0.23  0.34  0.44   262.526
              150        33                25                42                1.37  0.21    0.21  0.33  0.43   206.417
              200        33                25                42                1.39  0.19    0.19  0.31  0.42   159.059
              200        32.8              25.4              41.8              1.43  0.17    0.17  0.3   0.41   146.94
              200        31.2              28.5              40.2              1.48  0.16    0.16  0.29  0.41   157.073
              300        29.1              32.8              38.1              1.55  0.14    0.14  0.28  0.4    171.822
              300        27                36.3              36.7              1.6   0.13    0.13  0.28  0.336  13.691
              300        25.1              38.8              36.2              1.6   0.13    0.13  0.28  0.329  8.877
              300        22.7              41.8              35.5              1.6   0.13    0.13  0.28  0.325  6.65
              300        21                44                35                1.6   0.13    0.13  0.28  0.319  4.312
              300        21                44                35                1.6   0.13    0.13  0.28  0.314  2.796
              300        21                44                35                1.6   0.13    0.13  0.28  0.31   1.813
              300        21                44                35                1.6   0.13    0.13  0.28  0.306  1.175
              300        21                44                35                1.6   0.13    0.13  0.28  0.303  0.762
              SoilCrop BambatsiSoil
                LL=[0.2, 0.2, 0.2, 0.21, 0.23, 0.21, 0.19, 0.17, 0.16, 0.14, 0.13, 0.13, 0.13, 0.13, 0.13, 0.13, 0.13, 0.13]
                KL=[0.08, 0.08, 0.08, 0.08, 0.07, 0.06, 0.06, 0.05, 0.04, 0.04, 0.03, 0.02, 0.02, 0.015, 0.01, 0.01, 0.01, 0.01]
                XF=[1, 1, 1, 1, 1, 1, 1, 1, 0, 0, 0, 0, 0, 0, 0, 0, 0, 0]
              SoilCrop MaizeSoil: same as Validation.WaterTable.IA_Kanawha.paddock.Soil.Physical.BambatsiSoil
            CERESSoilTemperature Temperature
            Organic: FOMCNRatio=45; CarbonUnits=Total
              Thickness  Carbon  SoilCNRatio  FBiom  FInert  FOM
              50         4.07    11           0.08   0.4     125.774
              50         4.07    11           0.08   0.4     121.028
              50         4.03    11           0.072  0.42    116.462
              150        3.6     11           0.042  0.5     103.77
              150        2.92    11           0.028  0.62    92.4616
              150        2.19    11           0.022  0.74    82.3855
              200        1.32    11           0.02   0.8     70.6376
              200        0.76    11           0.02   0.8     60.565
              200        0.5     11           0.007  0.924   51.9287
              300        0.14    11           0      0.99    41.2273
              300        0.02    11           0      0.99    32.7313
              300        0.01    11           0      0.99    25.9861
              300        0       11           0      0.99    20.631
              300        0       11           0      0.99    16.3794
              300        0       11           0      0.99    13.004
              300        0       11           0      0.99    10.3242
              300        0       11           0      0.99    8.19658
              300        0       11           0      0.99    6.50745
            Chemical: PHUnits=Water
              Thickness=[50, 50, 50, 150, 150, 150, 200, 200, 200, 300, 300, 300, 300, 300, 300, 300, 300, 300]
              PH=[7.41, 7.41, 7.41, 7.41, 7.41, 7.42, 7.58, 7.82, 7.98, 8.16, 8.37, 8.57, 8.82, 9, 9, 9, 9, 9]
            Water: RelativeTo=LL15; FilledFromTop=false
              Thickness=[50, 50, 50, 150, 150, 150, 200, 200, 200, 300, 300, 300, 300, 300, 300, 300, 300, 300]
              InitialValues=[0.32, 0.32, 0.32, 0.33, 0.34, 0.33, 0.31, 0.3, 0.29, 0.28, 0.28, 0.28, 0.28, 0.28, 0.28, 0.28, 0.28, 0.28]
            Swim3 Swim: PrecipitationInterception=0; ersoil=1e-06; ernode=1e-06; slcerr=1e-06; Salb=0.13; CN2Bare=70; CNRed=20; CNCov=0.8; KDul=0.25; PSIDul=-250; VC=true; DTMin=0; DTMax=1440; MaxWaterIncrement=10; SpaceWeightingFactor=0; SoluteSpaceWeightingFactor=0; Dis=15; Disp=1; A=1; DTHC=0; DTHP=1; Diagnostics=false; WaterTable=0
            Nutrient
            Solute NO3: InitialValuesUnits=ppm; WaterTableConcentration=0; D0=0.05
              Thickness  InitialValues  Exco  FIP
              50         4.07           0     1
              50         4.07           0     1
              50         4.03           0     1
              150        3.6            0     1
              150        2.92           0     1
              150        2.19           0     1
              200        1.32           0     1
              200        0.76           0     1
              200        0.5            0     1
              300        0.14           0     1
              300        0.02           0     1
              300        0.01           0     1
              300        0              0     1
              300        0              0     1
              300        0              0     1
              300        0              0     1
              300        0              0     1
              300        0              0     1
            Solute NH4: InitialValuesUnits=ppm; WaterTableConcentration=0; D0=0.05
              Thickness  InitialValues  Exco  FIP
              50         2.03           1     1
              50         2.03           1     1
              50         2.02           1     1
              150        1.8            1     1
              150        1.46           1     1
              150        1.09           1     1
              200        0.66           1     1
              200        0.38           1     1
              200        0.25           1     1
              300        0.07           1     1
              300        0.01           1     1
              300        0              1     1
              300        0              1     1
              300        0              1     1
              300        0              1     1
              300        0              1     1
              300        0              0     1
              300        0              0     1
            Solute Urea: InitialValuesUnits=kg/ha; WaterTableConcentration=0; D0=0.05
              Thickness  InitialValues  Exco  FIP
              50         0              0     1
              50         0              0     1
              50         0              0     1
              150        0              0     1
              150        0              0     1
              150        0              0     1
              200        0              0     1
              200        0              0     1
              200        0              0     1
              300        0              0     1
              300        0              0     1
              300        0              0     1
              300        0              0     1
              300        0              0     1
              300        0              0     1
              300        0              0     1
              300        0              0     1
              300        0              0     1
          Plant maize: ResourceName=Maize
          Report OutputfileUSA3: EventNames=[Clock].EndOfDay
            VariableNames:
              [Clock].Today
              [SurfaceOrganicMatter].Wt
              [SWIM].WaterTable
              [SWIM].SW[12] as SW_200cm
              [SWIM].Drainage
              sum([SWIM].SWmm[1:12]) as SW_02m
              //[Bambatsi].AboveGround.Wt
              [Maize].AboveGround.Wt
              [Maize].Grain.Wt
              sum of [Maize].Leaf.Transpiration + [Soil].Swim.Es from 1-Jan to 31-Dec as Annual_ET
              sum of [Soil].Swim.Es from 1-Jan to 31-Dec as Annual_E
              sum of [Weather].Rain from 1-Jan to 31-Dec as Annual_Rain
              sum of [Soil].Swim.Runoff from 1-Jan to 31-Dec as Annual_Runoff
              sum of [Soil].Swim.Drainage from 1-Jan to 31-Dec as Annual_Drainage
      Simulation IL_Stelle
        Weather: FileName=IL_Stelle_NasaPower.met
        Clock: Start=2000-01-01; End=2018-12-31
        Summary summaryfile
        SoilArbitrator
        MicroClimate: a_interception=0; b_interception=1; c_interception=0; d_interception=0; SoilHeatFluxFraction=0.4; MinimumHeightDiffForNewLayer=0; NightInterceptionFraction=0.5; ReferenceHeight=2
        Zone paddock: Area=1; Slope=0; AspectAngle=0; Altitude=50
          Manager SWIMSetLowerBC
            LowerBCType = potential
            LowerBCValue = 1600
            script: same as in Validation.Tile DrainageSpacing.Drain.Base.paddock.SWIMSetLowerBC
          Manager Tillage on a fixed date: same as Validation.WaterTable.IA_Kanawha.paddock.Tillage on a fixed date
          Manager SowMaize: same as Validation.WaterTable.IA_Kanawha.paddock.SowMaize
          Manager FertiliseMaize: same as Validation.WaterTable.IA_Kanawha.paddock.FertiliseMaize
          Manager Harvesting: same as Validation.WaterTable.IA_Kanawha.paddock.Harvesting
          Fertiliser
          SurfaceOrganicMatter: InitialResidueName=maize; InitialResidueType=maize; InitialResidueMass=1000; InitialStandingFraction=0; InitialCPR=0; InitialCNR=80
          Soil: SoilType=KRF_Webster_107; Region=KRF_Webster_107; State=IL; Country=USA; ApsoilNumber=1; Latitude=0; Longitude=0; DataSource=ssurgo2apsim; Comments=None
            CERESSoilTemperature Temperature
            Swim3 Swim: PrecipitationInterception=0; ersoil=1e-06; ernode=1e-06; slcerr=1e-06; Salb=0.13; CN2Bare=70; CNRed=20; CNCov=0.8; KDul=0.25; PSIDul=-250; VC=true; DTMin=0; DTMax=30; MaxWaterIncrement=5; SpaceWeightingFactor=0; SoluteSpaceWeightingFactor=0; Dis=15; Disp=1; A=1; DTHC=0; DTHP=1; Diagnostics=false; WaterTable=0
            Nutrient
            Physical
              Thickness  ParticleSizeClay  ParticleSizeSand  ParticleSizeSilt  BD     AirDry  LL15  DUL   SAT    KS
              50         35                7.5               57.5              1.401  0.22    0.24  0.35  0.47   242.32
              50         35                7.5               57.5              1.401  0.22    0.24  0.35  0.47   243.072
              50         35                7.5               57.5              1.401  0.22    0.24  0.35  0.47   243.072
              150        36.5              7.5               56                1.401  0.24    0.25  0.35  0.47   210.346
              150        41.1              7.5               51.4              1.35   0.26    0.26  0.36  0.49   137.488
              150        45.7              7.5               46.8              1.32   0.28    0.28  0.36  0.5    89.761
              200        51.2              7.5               41.3              1.27   0.29    0.29  0.37  0.52   56.47
              200        52.4              7.5               40.1              1.35   0.28    0.28  0.36  0.48   45.9
              200        49.5              7.5               43                1.35   0.26    0.26  0.34  0.44   46.082
              300        46.1              7.5               46.4              1.27   0.23    0.23  0.31  0.42   41.277
              300        45                7.5               47.5              1.27   0.22    0.22  0.3   0.353  11.669
              300        45                7.5               47.5              1.27   0.22    0.22  0.3   0.347  7.732
              300        45                7.5               47.5              1.27   0.22    0.22  0.3   0.343  5.877
              300        45                7.5               47.5              1.27   0.22    0.22  0.3   0.338  3.894
              300        45                7.5               47.5              1.27   0.22    0.22  0.3   0.334  2.58
              300        45                7.5               47.5              1.27   0.22    0.22  0.3   0.33   1.709
              300        45                7.5               47.5              1.48   0.22    0.22  0.3   0.326  1.133
              300        45                7.5               47.5              1.53   0.22    0.22  0.3   0.323  0.751
              SoilCrop BambatsiSoil
                LL=[0.24, 0.24, 0.24, 0.25, 0.26, 0.28, 0.29, 0.28, 0.26, 0.23, 0.22, 0.22, 0.22, 0.22, 0.22, 0.22, 0.22, 0.22]
                KL=[0.08, 0.08, 0.08, 0.08, 0.07, 0.06, 0.06, 0.05, 0.04, 0.04, 0.03, 0.02, 0.02, 0.015, 0.01, 0.01, 0.01, 0.01]
                XF=[1, 1, 1, 1, 1, 1, 1, 1, 0, 0, 0, 0, 0, 0, 0, 0, 0, 0]
              SoilCrop MaizeSoil: same as Validation.WaterTable.IL_Stelle.paddock.Soil.Physical.BambatsiSoil
            Organic: FOMCNRatio=45; CarbonUnits=Total
              Thickness  Carbon  SoilCNRatio  FBiom  FInert  FOM
              50         2.33    11           0.08   0.4     125.774
              50         2.33    11           0.08   0.4     121.028
              50         2.33    11           0.072  0.42    116.462
              150        2.19    11           0.042  0.5     103.77
              150        1.79    11           0.028  0.62    92.4616
              150        1.37    11           0.022  0.74    82.3855
              200        0.89    11           0.02   0.8     70.6376
              200        0.58    11           0.02   0.8     60.565
              200        0.47    11           0.02   0.8     51.9287
              300        0.21    11           0.02   0.852   41.2273
              300        0.07    11           0.02   0.94    32.7313
              300        0.03    11           0.02   0.99    25.9861
              300        0.005   11           0.02   0.99    20.631
              300        0       11           0.02   0.99    16.3794
              300        0       11           0.02   0.99    13.004
              300        0       11           0      0       10.3242
              300        0       11           0      0       8.19658
              300        0       11           0      0       6.50745
            Water: RelativeTo=LL15; FilledFromTop=false
              Thickness=[50, 50, 50, 150, 150, 150, 200, 200, 200, 300, 300, 300, 300, 300, 300, 300, 300, 300]
              InitialValues=[0.35, 0.35, 0.35, 0.35, 0.36, 0.36, 0.37, 0.36, 0.34, 0.31, 0.3, 0.3, 0.3, 0.3, 0.3, 0.3, 0.3, 0.3]
            Chemical: PHUnits=Water
              Thickness=[50, 50, 50, 150, 150, 150, 200, 200, 200, 300, 300, 300, 300, 300, 300, 300, 300, 300]
              PH=[7.3, 7.3, 7.3, 7.37, 7.57, 7.78, 8.03, 8.28, 8.52, 8.81, 8.89, 8.89, 8.89, 8.89, 8.89, 8.89, 8.89, 8.89]
            Solute NO3: InitialValuesUnits=ppm; WaterTableConcentration=0; D0=0.05
              Thickness  InitialValues  Exco  FIP
              50         2.33           0     1
              50         2.33           0     1
              50         2.33           0     1
              150        2.19           0     1
              150        1.79           0     1
              150        1.37           0     1
              200        0.89           0     1
              200        0.58           0     1
              200        0.47           0     1
              300        0.21           0     1
              300        0.07           0     1
              300        0.03           0     1
              300        0.005          0     1
              300        0              0     1
              300        0              0     1
              300        0              0     1
              300        0              0     1
              300        0              0     1
            Solute NH4: InitialValuesUnits=ppm; WaterTableConcentration=0; D0=0.05
              Thickness  InitialValues  Exco  FIP
              50         1.16           1     1
              50         1.16           1     1
              50         1.16           1     1
              150        1.1            1     1
              150        0.89           1     1
              150        0.69           1     1
              200        0.45           1     1
              200        0.29           1     1
              200        0.23           1     1
              300        0.11           1     1
              300        0.03           1     1
              300        0.01           1     1
              300        0.005          1     1
              300        0              1     1
              300        0              1     1
              300        0              1     1
              300        0              0     1
              300        0              0     1
            Solute Urea: same as Validation.WaterTable.IA_Kanawha.paddock.Soil.Urea
          Plant maize: ResourceName=Maize
          Report OutputfileUSA3: same as Validation.WaterTable.IA_Kanawha.paddock.OutputfileUSA3
    Folder TileDrainageAndWaterTable
      Folder Systems 13 and 14
        Memo
          # Things to look at:

          -	Again in both of these look at the value in the potential boundary condition.

          Central Iowa experiment long-term experiment (est 2009) with different cropping systems. System_13 refers to a corn-soy and System_14 refers to a soy-corn rotation. Exp data collected from 3-replications. Each plot (size 24 rows x about 30 m long) has three subsurface tiles drainage, two at the border and one at the center of each plot. Subsurface drainage and N leaching were collected approx. every 5-days (March to November). Soil moisture and WT data were collected using Decagon sesnors. WT well depth about 2.5m.

          ### Status of the sim (May 2022) - SVA notes:
          1. Weather comes a local station (on site) until 2018, after than we use data from IEM station (5 km distance from the site)
          2. Soil profile is identical to the one used in classic
          3. Management is 95% final (need to double check and verfiy as we noticed some errors in the conversion from classic to NG)
          4. Cultivars: we used a fixed corn and a fixed soy cultivar for all years, we have not yet converted all the cultivars from classic to NG
          5. Additional measured data to be added (work in progress)

          ### Relevant publications
          1. Archontoulis et al. 2020 (Crop Science) https://acsess.onlinelibrary.wiley.com/doi/full/10.1002/csc2.20039
          2. Martinez-Feria et al. 2018 (Agric, Ecos & Env) https://www.sciencedirect.com/science/article/abs/pii/S0167880918300021
          2. Martinez-Feria et al. 2016 (Field Crops Res) https://www.sciencedirect.com/science/article/abs/pii/S0378429016302027
          4. Dietzel et al. 2016 (Global Change Biology) https://onlinelibrary.wiley.com/doi/full/10.1111/gcb.13101
        Simulation System_13
          Clock: Start=2006-01-01; End=2019-12-31
          Weather: FileName=KelleyNov2021.met
          SoilArbitrator
          MicroClimate: a_interception=0; b_interception=1; c_interception=0; d_interception=0; SoilHeatFluxFraction=0.4; MinimumHeightDiffForNewLayer=0; NightInterceptionFraction=0.5; ReferenceHeight=2
          Summary summaryfile
          Zone paddock: Area=1; Slope=0; AspectAngle=0; Altitude=50
            Folder DeadScripts (disabled)
              Manager WaterTable script
```csharp
using Models.Soils;
using System;
using Models.Core;
using Models.PMF;
namespace Models
{
    [Serializable]
    [System.Xml.Serialization.XmlInclude(typeof(Model))]
    public class Script : Model
    {
        [Link] Clock Clock;

    }
}
```
              Manager System Variables
                script: same as in Validation.TileDrainageAndWaterTable.Systems 13 and 14.System_13.paddock.DeadScripts.WaterTable script
              Manager InitialiseWaterTableOnce
              Manager InstallTileDrainage
```csharp
using Models.Soils;
using System;
using Models.Core;
using Models.PMF;
namespace Models
{
    [Serializable]
    [System.Xml.Serialization.XmlInclude(typeof(Model))]
    public class Script : Model
    {
        [Link] Clock Clock;

        [EventSubscribe("DoManagement")]
        private void OnDoManagement(object sender, EventArgs e)
        {
            /*
                ! tiles were installed in 2009

if year > 2008 then 
subsurface_drain_open = 'true' ! this means tile = open
else
subsurface_drain_open = 'false' ! this means tile = closed
endif 
            */
        }
    }
}
```
              Manager OxdefRUEDamageSoybean
```csharp
using Models.Soils;
using System;
using System.Collections.Generic;
using Models.Core;
namespace Models
{
    [Serializable]
    [System.Xml.Serialization.XmlInclude(typeof(Model))]
    public class Script : Model
    {

    /*
      
   [Link] Paddock MyPaddock; // Can be used to dynamically get access to simulation structure and variables
   [Input] DateTime Today;   // Equates to the value of the current simulation date - value comes from CLOCK
   [Param] string crop;         // Will be used to get oxdef values while crop is not out
   [Param] double threshold;
   [Param] double slope;
   [Param] double max;
   [Param] string xDayDmgStr;  //For the stage linear interpolation 
   [Param] string yDayDmgStr;
   [Param] int dmgDays;      //Days of 0 oxdef to wait to apply damage
   [Output] double oxdef_sum;
   [Output] double rue_damage;
   [Output] int day_limit;
   
   Component comp; //Hopefully the crop!
   bool damaged = false; //For if we are in a damaged state
   int days = 0; 
   
   List<double> tracker = new List<double>();
   
   double[] oldRUE; //For if the crop is maize (plant module supports RUEFactor, maize model does not...)
   bool afterSowing = false;
   
   //Linear interpolation function for doing days to set damage
   double[] xDayDmgFun;
   double[] yDayDmgFun;
   

   // The following event handler will be called once at the beginning of the simulation
   [EventHandler] public void OnInitialised()
   {
      comp = (Component) MyPaddock.LinkByName(crop);
      
      xDayDmgFun = (from a in xDayDmgStr.Split(',')
            select Convert.ToDouble(a)).ToArray();
      
      yDayDmgFun = (from a in yDayDmgStr.Split(',')
            select Convert.ToDouble(a)).ToArray();
      
   }
   
   [EventHandler] public void OnSowing()
   {
      if (crop == "maize")
         afterSowing = true;
   }

   // The following event handler will be called each day at the beginning of the day
   [EventHandler] public void OnPrepare()
   {
      //Needed for maize, unfortunately RUE cannot be read on sowing...
      if (afterSowing)
      {
         comp.Get("RUE", out oldRUE);
         afterSowing = false;
      }
      
      if (damaged)
         days++;
      
      string status;
      comp.Get("plant_status", out status);
      if (status != "out" && !damaged)
      {
         double oxdef_photo;
         comp.Get("oxdef_photo", out oxdef_photo);
         tracker.Insert(0, (1.0 - oxdef_photo));
      
         if (tracker.Take(dmgDays).Sum() == 0.0)//Check if the last 4 days have had no oxdef
         {
            double total = tracker.Sum();
            rue_damage = oxdefDmg(total);
            if (rue_damage > 0.0)
            {
               day_limit = dayLimit(total);
               doDamage(rue_damage);
               damaged = true;
            }
            
            
            tracker.Clear(); 
            oxdef_sum = 0.0;
         }
         else
            oxdef_sum = tracker.Sum();
      }
      else
         oxdef_sum = 0.0;
      
      
      
      if (days == day_limit && damaged)
      {
         damaged = false;
         days = 0;
         day_limit = 0;
         rue_damage = 0.0;
         doDamage(0.0);
      }

   }
   
   [EventHandler] public void OnHarvesting()
   {
      tracker.Clear();
   }
   
   private void doDamage(double dmg)
   {
      if (crop == "maize")
         comp.Set("RUE", oldRUE.Select(x => x * (1.0 - dmg)).ToArray());
      else //Assume Plant module if not maize. this means the script will not work on some crops
         comp.Set("RUEFactor", (1.0 - dmg));
   }
   
   private double oxdefDmg(double totalOxdef)
   {
      return MathUtility.Bound(slope * (totalOxdef - threshold), 0.0, max);
   }
   
   private int dayLimit(double totalOxdef)
   {
      double stage;
      comp.Get("stage", out stage);
      bool dum;
      double mult = MathUtility.LinearInterpReal(stage, xDayDmgFun, yDayDmgFun, out dum);
      return Convert.ToInt32(Math.Round(mult * totalOxdef));
   }


*/
    }
}
```
              Manager OxdefRUEDamagemaize: same as Validation.TileDrainageAndWaterTable.Systems 13 and 14.System_13.paddock.DeadScripts.OxdefRUEDamageSoybean
              Manager WinterTileClose
```csharp
using Models.Soils;
using System;
using Models.Core;
using Models.PMF;
namespace Models
{
    [Serializable]
    [System.Xml.Serialization.XmlInclude(typeof(Model))]
    public class Script : Model
    {
        [Link] Clock Clock;

        [EventSubscribe("DoManagement")]
        private void OnDoManagement(object sender, EventArgs e)
        {
            /*
                ! tiles were installed in 2009

if day > 60 and day < 365 then 
subsurface_drain_open = 'true' ! this means tile = open
else
subsurface_drain_open = 'false' ! this means tile = closed
endif 
            */
        }
    }
}
```
            Operations Mgt_system13
              2006-04-20  [SurfaceOrganicMatter].Incorporate(fraction:0.15, depth:250)
              2006-05-15  [Soybean].Sow(cultivar: Generic_MG2, population: 30, depth: 50, rowSpacing:750)
              2006-06-10  [Soybean].Harvest()
              2006-06-10  [Soybean].EndCrop()
              2006-06-11  [SurfaceOrganicMatter].Incorporate(fraction:0.01, depth:250)
              2007-04-20  [SurfaceOrganicMatter].Incorporate(fraction:0.15, depth:250)
              2007-04-05  [Fertiliser].Apply(Amount:168, Type: UreaN, Depth: 50)
              2007-04-05  [Maize].Sow(cultivar: Laila, population: 8, depth: 50, rowSpacing:750)
              2007-10-15  [Maize].Harvest()
              2007-10-15  [Maize].EndCrop()
              2007-11-11  [SurfaceOrganicMatter].Incorporate(fraction:0.6, depth:250)
              2008-04-20  [SurfaceOrganicMatter].Incorporate(fraction:0.15, depth:250)
              2008-05-15  [Soybean].Sow(cultivar: Generic_MG2, population: 30, depth: 50, rowSpacing:750)
              2008-09-20  [Soybean].Harvest()
              2008-09-20  [Soybean].EndCrop()
              2008-10-20  [SurfaceOrganicMatter].Incorporate(fraction:0.3, depth:250)
              2009-08-05  [Fertiliser].Apply(84, Fertiliser.Types.NH4NO3N, 150)
              2009-06-17  [Fertiliser].Apply(56, Fertiliser.Types.NH4NO3N, 150)
              2009-08-05  [Maize].Sow(cultivar: Laila, population: 8, depth: 50, rowSpacing:750)
              2009-10-10  [Maize].Harvest()
              2009-10-10  [Maize].EndCrop()
              2009-11-11  [SurfaceOrganicMatter].Incorporate(fraction:0.5, depth:250)
              2010-04-20  [SurfaceOrganicMatter].Incorporate(fraction:0.25, depth:150)
              2010-06-05  [Soybean].Sow(cultivar: Generic_MG2, population: 30, depth: 50, rowSpacing:750)
              2010-09-02  [Soybean].Harvest()
              2010-09-02  [Soybean].EndCrop()
              2011-05-11  [Fertiliser].Apply(87, Fertiliser.Types.NH4NO3N, 150)
              2011-06-29  [Fertiliser].Apply(39, Fertiliser.Types.NH4NO3N, 150)
              2011-05-11  [Maize].Sow(cultivar: Laila, population: 8, depth: 50, rowSpacing:750)
              2011-10-03  [Maize].Harvest()
              2011-10-03  [Maize].EndCrop()
              2012-04-20  [SurfaceOrganicMatter].Incorporate(fraction:0.25, depth:150)
              2012-05-11  [Soybean].Sow(cultivar: Generic_MG2, population: 30, depth: 50, rowSpacing:750)
              2012-09-04  [Soybean].Harvest()
              2012-09-04  [Soybean].EndCrop()
              2013-05-17  [Fertiliser].Apply(89, Fertiliser.Types.NH4NO3N, 150)
              2013-06-28  [Fertiliser].Apply(115, Fertiliser.Types.NH4NO3N, 150)
              2013-05-15  [Maize].Sow(cultivar: Laila, population: 8, depth: 50, rowSpacing:750)
              2013-10-01  [Maize].Harvest()
              2013-10-01  [Maize].EndCrop()
              2014-04-20  [SurfaceOrganicMatter].Incorporate(fraction:0.25, depth:150)
              2014-05-20  [Soybean].Sow(cultivar: Generic_MG2, population: 30, depth: 50, rowSpacing:750)
              2014-09-05  [Soybean].Harvest()
              2014-09-05  [Soybean].EndCrop()
              2015-05-13  [Fertiliser].Apply(78, Fertiliser.Types.UreaN, 150);
              2015-06-23  [Fertiliser].Apply(130, Fertiliser.Types.UreaN, 150);
              2015-05-13  [Maize].Sow(cultivar: Laila, population: 8, depth: 50, rowSpacing:750)
              2015-10-13  [Maize].Harvest()
              2015-10-13  [Maize].EndCrop()
              2016-04-15  [Fertiliser].Apply(Amount:29, Type: UreaN, Depth: 50)
              2016-04-22  [SurfaceOrganicMatter].Incorporate(fraction:0.01, depth:250)
              2016-05-18  [Soybean].Sow(cultivar: Generic_MG2, population: 30, depth: 50, rowSpacing:750)
              2016-10-17  [Soybean].Harvest()
              2016-10-17  [Soybean].EndCrop()
              2017-03-05  [SurfaceOrganicMatter].Incorporate(fraction:0.01, depth:150)
              2017-05-15  [Fertiliser].Apply(Amount:84, Type: UreaN, Depth: 50)
              2017-05-15  [Maize].Sow(cultivar: Laila, population: 8, depth: 50, rowSpacing:750)
              2017-10-18  [Maize].Harvest()
              2017-10-18  [Maize].EndCrop()
              2018-04-22  [SurfaceOrganicMatter].Incorporate(fraction:0.01, depth:250)
              2018-05-17  [Soybean].Sow(cultivar: Generic_MG2, population: 30, depth: 50, rowSpacing:750)
              2018-10-23  [Soybean].Harvest()
              2018-10-23  [Soybean].EndCrop()
              2019-03-05  [SurfaceOrganicMatter].Incorporate(fraction:0.01, depth:150)
              2019-04-14  [Fertiliser].Apply(30, Fertiliser.Types.NH4N, 50)
              2019-04-24  [Fertiliser].Apply(Amount:112, Type: UreaN, Depth: 50)
              2019-04-06  [Maize].Sow(cultivar: Laila, population: 8, depth: 50, rowSpacing:750)
              2019-06-28  [Fertiliser].Apply(Amount:66, Type: UreaN, Depth: 50)
              2019-11-14  [Maize].Harvest()
              2019-11-14  [Maize].EndCrop()
            Manager SWIMSetLowerBC
              LowerBCType = potential
              LowerBCValue = 2700
              script: same as in Validation.Tile DrainageSpacing.Drain.Base.paddock.SWIMSetLowerBC
            Manager CalculateRollingWaterBalance
            Fertiliser
            Irrigation
            SurfaceOrganicMatter: InitialResidueName=soybean; InitialResidueType=soybean; InitialResidueMass=1400; InitialStandingFraction=0; InitialCPR=0; InitialCNR=36.5
            Soil SoilCobs: DataSource=CSIRO Sustainable Ecosystems, Toowoomba
              Comments=Soil naming structure: \State\Region\Classification-Local Name (Site/district and locator number); oc and ph estimated
              Physical
                Thickness  ParticleSizeClay  ParticleSizeSand  ParticleSizeSilt  BD     AirDry  LL15   DUL    SAT    KS
                37         25.67             38.29             36.04             1.25   0.07    0.14   0.263  0.435  617
                38         25.67             38.29             36.04             1.25   0.0805  0.161  0.296  0.462  617
                50         26.43             37.95             35.65             1.25   0.055   0.11   0.256  0.443  617
                90         28.09             36.57             35.65             1.25   0.088   0.11   0.254  0.446  205
                85         28.5              36.23             35.65             1.25   0.12    0.12   0.293  0.478  205
                100        29                34                37                1.35   0.115   0.115  0.252  0.445  205
                200        29                34                37                1.35   0.122   0.122  0.252  0.4    135
                300        27                37                36                1.551  0.1     0.1    0.296  0.394  388
                300        27                37                36                1.551  0.11    0.11   0.296  0.389  388
                320        27                37                36                1.551  0.138   0.138  0.296  0.389  388
                300        27                37                36                1.551  0.165   0.165  0.296  0.349  11.872
                280        27                37                36                1.65   0.146   0.146  0.274  0.323  9.125
                300        27                37                36                1.65   0.146   0.146  0.274  0.319  6.639
                300        27                37                36                1.65   0.146   0.146  0.274  0.314  4.523
                300        27                37                36                1.65   0.146   0.146  0.274  0.31   3.255
                300        27                37                36                1.65   0.146   0.146  0.274  0.307  2.342
                300        27                37                36                1.65   0.146   0.146  0.274  0.303  1.686
                300        27                37                36                1.65   0.146   0.146  0.274  0.301  1.213
                SoilCrop MaizeSoil
                  LL=[0.14, 0.161, 0.11, 0.11, 0.12, 0.148673, 0.165864, 0.192725, 0.22341386, 0.252352, 0.27151, 0.256995, 0.262, 0.262, 0.262, 0.262, 0.262, 0.262]
                  KL=[0.08, 0.08, 0.08, 0.08, 0.08, 0.08, 0.08, 0.08, 0.08, 0.0420478, 0.03459, 0.029159, 0.0230232, 0.0162927, 0.0111758, 0.0067466, 0.00313554, 0.000603434]
                  XF=[1, 1, 1, 1, 1, 1, 1, 1, 1, 1, 1, 1, 0.4, 0, 0, 0, 0, 0]
                SoilCrop SoybeanSoil: same as Validation.TileDrainageAndWaterTable.Systems 13 and 14.System_13.paddock.SoilCobs.Physical.MaizeSoil
                SoilCrop WheatSoil
                  LL=[0.14, 0.161, 0.11, 0.11, 0.12, 0.148673, 0.165864, 0.192725, 0.22341386, 0.252352, 0.27151, 0.256995, 0.262, 0.262, 0.262, 0.262, 0.262, 0.262]
                  KL=[0.1, 0.1, 0.1, 0.1, 0.1, 0.1, 0.1, 0.1, 0.1, 0.0525598, 0.0432375, 0.0364488, 0.0287791, 0.0203659, 0.0139697, 0.00843325, 0.00391942, 0.000754293]
                  XF=[1, 1, 1, 1, 1, 1, 1, 1, 1, 1, 1, 1, 0.4, 0, 0, 0, 0, 0]
                  LL source: Estimated based on local knowledge (layer 1, 2, 3, 4, 5, 6, 7)
              Organic: FOMCNRatio=23; CarbonUnits=Total
                Thickness  Carbon  SoilCNRatio  FBiom       FInert     FOM
                37         3.926   11           0.1225      0.365      93.5878
                38         3.822   11           0.1225      0.365      90.8917
                50         3.38    11           0.0915855   0.365      87.4623
                90         3.029   11           0.0643885   0.42705    81.612
                85         2.73    11           0.0488732   0.4589875  76.4466
                100        1.703   11           0.0398626   0.49275    70.7865
                200        1.729   11           0.0314565   0.715      60.6927
                300        1.495   11           0.0240318   0.946575   48.1853
                300        0.637   11           0.0192202   0.965205   38.2554
                320        0.208   11           0.0161866   0.984456   29.9081
                300        0.13    11           0.0141235   0.999      23.7447
                280        0.13    11           0.0129188   0.999      19.1438
                300        0.13    11           0.0117614   0.999      15.1987
                300        0.13    11           0.0106631   0.999      12.0666
                300        0.13    11           0.00990398  0.999      9.57992
                300        0.13    11           0.0092672   0.999      7.60571
                300        0.13    11           0.00872398  0.999      6.03835
                300        0.13    11           0.0082541   0.999      4.79398
              Chemical: PHUnits=Water
                Thickness=[37, 38, 50, 90, 85, 100, 200, 300, 300, 320, 300, 280, 300, 300, 300, 300, 300, 300]
                PH=[6.318, 6.318, 5.902, 5.948, 5.959, 6.7, 6.7, 7.9, 7.9, 7.9, 7.9, 7.9, 7.9, 7.9, 7.9, 7.9, 7.9, 7.9]
                PH source: Estimated based on local knowledge (layer 1, 2, 3, 4, 5, 6, 7)
              Water: FilledFromTop=false
                Thickness=[37, 38, 50, 90, 85, 100, 200, 300, 300, 320, 300, 280, 300, 300, 300, 300, 300, 300]
                InitialValues=[0.263, 0.296, 0.256, 0.254, 0.293, 0.252, 0.252, 0.296, 0.296, 0.296, 0.296, 0.274, 0.274, 0.274, 0.274, 0.274, 0.274, 0.274]
              Swim3 Swim: PrecipitationInterception=0; ersoil=1e-06; ernode=1e-06; slcerr=1e-06; Salb=0.13; CN2Bare=65; CNRed=20; CNCov=0.8; KDul=0.3; PSIDul=-300; VC=true; DTMin=0; DTMax=1440; MaxWaterIncrement=10; SpaceWeightingFactor=0; SoluteSpaceWeightingFactor=0; Dis=15; Disp=1; A=1; DTHC=0; DTHP=1; Diagnostics=false; WaterTable=0
                SwimSubsurfaceDrain: DrainDepth=1070; DrainSpacing=13500; DrainRadius=52; Klat=1000; ImpermDepth=4500
              CERESSoilTemperature Temperature
              Nutrient
              Solute NO3: InitialValuesUnits=kg/ha; WaterTableConcentration=0; D0=0.05; Exco=[0, 0, 0, 0, 0, 0, 0, 0, 0, 0, 0, 0, 0, 0, 0, 0]; FIP=[1, 1, 1, 1, 1, 1, 1, 1, 1, 1, 1, 1, 1, 1, 1, 1]
                Thickness=[37, 38, 50, 90, 85, 100, 200, 300, 300, 320, 300, 280, 300, 300, 300, 300, 300, 300]
                InitialValues=[0.5, 0.8, 0.9, 2.2, 2.9, 3.6, 4, 3, 1, 1.7, 1.7, 0.9, 0, 0.7, 1, 1, 1, 1]
              Solute NH4: InitialValuesUnits=kg/ha; WaterTableConcentration=0; D0=0.05; Exco=[1, 1, 1, 1, 1, 1, 1, 1, 1, 1, 1, 1, 1, 1, 1, 1]; FIP=[1, 1, 1, 1, 1, 1, 1, 1, 1, 1, 1, 1, 1, 1, 1, 1]
                Thickness=[37, 38, 50, 90, 85, 100, 200, 300, 300, 320, 300, 280, 300, 300, 300, 300, 300, 300]
                InitialValues=[1.5, 1.5, 1.4, 0.6, 0.5, 4.2, 4.1, 4.4, 4.1, 0.3, 0.1, 0.8, 0, 1, 1, 1, 1, 1]
              Solute Urea: InitialValues=[0, 0, 0, 0, 0, 0, 0, 0, 0, 0, 0, 0, 0, 0, 0, 0, 0, 0]; InitialValuesUnits=kg/ha; WaterTableConcentration=0; D0=0.05; Exco=[0, 0, 0, 0, 0, 0, 0, 0, 0, 0, 0, 0, 0, 0, 0, 0]; FIP=[1, 1, 1, 1, 1, 1, 1, 1, 1, 1, 1, 1, 1, 1, 1, 1]
                Thickness=[37, 38, 50, 90, 85, 100, 200, 300, 300, 320, 300, 280, 300, 300, 300, 300, 300, 300]
            Plant maize: ResourceName=Maize
            Plant soybean: ResourceName=Soybean
            Report Outputfile: EventNames=[Clock].EndOfDay
              VariableNames:
                [Clock].Today
                ([Maize].AboveGround.Wt + [Soybean].AboveGround.Wt)*10 as CropBiomass
                ([Maize].Grain.Wt + [Soybean].Grain.Wt)*10 as CropYield
                [SurfaceOrganicMatter].Wt
                [SWIM].WaterTable
                [SWIM].SubsurfaceDrain
                [SWIM].SubsurfaceDrainNO3
                ([SWIM].SW[3]*0.5 + [SWIM].SW[4]*0.5) as SW_15cm
                ([SWIM].SW[6]*0.65 + [SWIM].SW[7]*0.35) as SW_45cm
                [SWIM].SW[12] as SW_200cm
                [SWIM].Drainage
                sum([SoilCobs].Nutrient.NO3.kgha[1:5]) as NO3_030cm
                sum([SoilCobs].Nutrient.NO3.kgha[6:7]) as NO3_3060cm
                sum([SWIM].SWmm[1:12]) as SW_02m
                Sum of [SWIM].SubsurfaceDrain from 1-Jan to 31-Dec as Annual_tile_drainage
                Sum of [SWIM].SubsurfaceDrainNO3 from 1-Jan to 31-Dec as Annual_tile_drainage_no3//
                [CalculateRollingWaterBalance].Script.WaterBalanceCumulative as WaterBalanceCumulative
        Simulation System_14
          Clock: Start=2006-01-01; End=2019-12-31
          Weather: FileName=KelleyNov2021.met
          SoilArbitrator
          MicroClimate: a_interception=0; b_interception=1; c_interception=0; d_interception=0; SoilHeatFluxFraction=0.4; MinimumHeightDiffForNewLayer=0; NightInterceptionFraction=0.5; ReferenceHeight=2
          Summary summaryfile
          Zone paddock: Area=1; Slope=0; AspectAngle=0; Altitude=50
            Folder DeadScripts (disabled)
              Manager SpecialReporter
```csharp
using Models.Soils;
using System;
using Models.Core;
namespace Models
{
    [Serializable]
    [System.Xml.Serialization.XmlInclude(typeof(Model))]
    public class Script : Model
    {

    /*
      
   [Link] Paddock MyPaddock; // Can be used to dynamically get access to simulation structure and variables
   [Input] DateTime Today;   // Equates to the value of the current simulation date - value comes from CLOCK
   [Param] string date;         // The value for this will come from the Properties page.
   [Param] string date2;
   
   [Event] public event NullTypeDelegate SpecialReport;
   [Event] public event NullTypeDelegate SpecialReport2;

   
   // The following event handler will be called once at the beginning of the simulation
   [EventHandler] public void OnInitialised()
   {
      
   }
      
   // The following event handler will be called each day at the beginning of the day
   [EventHandler] public void OnPrepare()
   {
      if (DateUtility.DatesEqual(date, Today))
         SpecialReport.Invoke();
      
      if (DateUtility.DatesEqual(date2, Today))
         SpecialReport2.Invoke();
   }
   

*/
    }
}
```
              Manager WaterTable script
                script: same as in Validation.TileDrainageAndWaterTable.Systems 13 and 14.System_13.paddock.DeadScripts.WaterTable script
              Manager System Variables
                script: same as in Validation.TileDrainageAndWaterTable.Systems 13 and 14.System_13.paddock.DeadScripts.WaterTable script
              Manager InitialiseWaterTableOnce
              Manager InstallTileDrainage
                script: same as in Validation.TileDrainageAndWaterTable.Systems 13 and 14.System_13.paddock.DeadScripts.WaterTable script
              Manager OxdefRUEDamageSoybean: same as Validation.TileDrainageAndWaterTable.Systems 13 and 14.System_13.paddock.DeadScripts.OxdefRUEDamageSoybean
              Manager OxdefRUEDamagemaize: same as Validation.TileDrainageAndWaterTable.Systems 13 and 14.System_13.paddock.DeadScripts.OxdefRUEDamageSoybean
              Manager WinterTileClose
                script: same as in Validation.TileDrainageAndWaterTable.Systems 13 and 14.System_13.paddock.DeadScripts.WaterTable script
            Manager SWIMSetLowerBC
              LowerBCType = potential
              LowerBCValue = 2700
```csharp
using Models.Climate;
using APSIM.Shared.Utilities;
using Models.Soils.Nutrients;
using Models.Soils;
using Models.PMF;
using Models.Core;
using System.Xml.Serialization;
using System;
using Models.AgPasture;
using Models.Interfaces;

namespace Models
{
    [Serializable] 
    [System.Xml.Serialization.XmlInclude(typeof(Model))]
    public class Script : Model
    {
        [Link] Clock clock;
        [Link] ISummary summary;
        [Link] private Swim3 swim;
        
        public enum LowerBCTypeOptions {gradient,seepage,potential};

        [Separator("Sets the lower boundary condition type (and value if set to 'potential' for SWIM3. The change is applied at the beginning of the first day of the simulation.")]
        [Description("What lower boundary condition is wanted?")] 
        public LowerBCTypeOptions LowerBCType { get; set; }
        
        [Description("If 'potential', then what potential? Should be negative (mm) ")]
        [Display(EnabledCallback = "IsPotential")] 
        public double LowerBCValue { get; set; }
        
        /// <summary></summary>
        public bool IsPotential => LowerBCType == LowerBCTypeOptions.potential;
        

        public double SoilWaterStart  { get; set; }
        public double SoilWaterEnd  { get; set; }

        [EventSubscribe("DoManagement")]
        private void DoDailyCalculations(object sender, EventArgs e)
        {
            if (clock.Today == clock.StartDate)
            {
                summary.WriteMessage(this, "Script is setting lower boundary condition to " + LowerBCType, MessageType.Diagnostic);
                if (LowerBCType == LowerBCTypeOptions.gradient)
                    swim.SetLowerBCForGradient(bbcGradient: 0.0);   // in cm/cm (ibbc=0) Note that this is the default setting
                else if (LowerBCType == LowerBCTypeOptions.potential)
                //  convert to cm (ibbc=1), DUL is -100 cm so values more positive will often result in inflow to the bottom of the soil profile. Input in mm so divide here.
                    swim.SetLowerBCForGivenPotential(bbcPotential: LowerBCValue /10.0 );    
                else if (LowerBCType == LowerBCTypeOptions.seepage)
                    swim.SetLowerBCForSeepage(bbcPotentialSeepage: 0.0);  // in cm (ibbc=3). This is for zero-tension lysimeters
                else
                    throw new Exception("Wrong lower boundary condition type");
            }
        }
    }
}
```
            Manager N Deposition
              PPM = 0.0078
```csharp
using Models.Soils;
using System;
using Models.Climate;
using Models.Core;
using Models.PMF;
namespace Models
{
    [Serializable]
    [System.Xml.Serialization.XmlInclude(typeof(Model))]
    public class Script : Model
    {
        [Link] Clock Clock;
        [Link] Weather Weather;
        [Link] Fertiliser Fertiliser;

        [Description("Rainfall NO3N ppm.")]
        public double PPM { get; set; }

        [Description("Nitrogen deposited by rainfall.")]
        public double NDeposited { get => deposition; }
        
        private double deposition;
        [EventSubscribe("DoManagement")]
        private void OnDoManagement(object sender, EventArgs e)
        {
            deposition = Weather.Rain * PPM;
            if (deposition > 0)
                Fertiliser.Apply(deposition, Fertiliser.Types.NO3N, doOutput: false); 
        }
    }
}
```
            Operations Mgt_system14
              //   year
              2006-05-03  [SurfaceOrganicMatter].Incorporate(fraction: 0.01, depth: 150)
              2006-05-15  [Fertiliser].Apply(84, Fertiliser.Types.UreaN, 50)
              2006-05-15  [Maize].Sow(cultivar: Laila, population: 7, depth: 50, rowSpacing:760)
              2006-10-18  [Maize].Harvest
              2006-10-18  [Maize].EndCrop
              2006-11-11  [SurfaceOrganicMatter].Incorporate(fraction: 0.5, depth: 250)
              2007-04-15  [Fertiliser].Apply(29, Fertiliser.Types.UreaN, 50)
              2007-04-22  [SurfaceOrganicMatter].Incorporate(fraction: 0.01, depth: 150)
              2007-05-18  [Soybean].Sow(cultivar: Generic_MG2, population: 30.5, depth: 50, rowSpacing:760)
              2007-10-17  [Soybean].Harvest
              2007-10-17  [Soybean].EndCrop
              2008-05-15  [Fertiliser].Apply(72, Fertiliser.Types.NH4NO3N, 150)
              2008-06-24  [Fertiliser].Apply(101, Fertiliser.Types.NH4NO3N, 150)
              2008-05-15  [Maize].Sow(cultivar: Laila, population: 7.9, depth: 50, rowSpacing:760)
              2008-10-12  [Maize].Harvest
              2008-10-12  [Maize].EndCrop
              2008-11-11  [SurfaceOrganicMatter].Incorporate(fraction: 0.01, depth: 150)
              2009-05-08  [Soybean].Sow(cultivar: Generic_MG2, population: 30, depth: 50, rowSpacing:750)
              2009-09-25  [Soybean].Harvest
              2009-09-25  [Soybean].EndCrop
              2010-05-06  [Fertiliser].Apply(87, Fertiliser.Types.UreaN, 150)
              2010-06-17  [Fertiliser].Apply(18, Fertiliser.Types.UreaN, 150)
              2010-05-06  [Maize].Sow(cultivar: Laila, population: 7.9, depth: 50, rowSpacing:760)
              2010-09-19  [Maize].Harvest
              2010-09-19  [Maize].EndCrop
              2011-05-11  [Soybean].Sow(cultivar: Generic_MG2, population: 30, depth: 50, rowSpacing:750)
              2011-09-10  [Soybean].Harvest
              2011-09-10  [Soybean].EndCrop
              2012-05-11  [Fertiliser].Apply(87, Fertiliser.Types.UreaN, 150)
              2012-06-12  [Fertiliser].Apply(134, Fertiliser.Types.UreaN, 150)
              2012-05-11  [Maize].Sow(cultivar: Laila, population: 7.9, depth: 50, rowSpacing:760)
              2012-09-22  [Maize].Harvest
              2012-09-22  [Maize].EndCrop
              2013-04-15  [Fertiliser].Apply(29, Fertiliser.Types.UreaN, 50)
              2013-05-17  [Soybean].Sow(cultivar: Generic_MG2, population: 30, depth: 50, rowSpacing:750)
              2013-09-10  [Soybean].Harvest
              2013-09-10  [Soybean].EndCrop
              2014-05-20  [Fertiliser].Apply(78, Fertiliser.Types.UreaN, 150)
              2014-06-16  [Fertiliser].Apply(105, Fertiliser.Types.UreaN, 150)
              2014-05-20  [Maize].Sow(cultivar: Laila, population: 7.9, depth: 50, rowSpacing:760)
              2014-09-10  [Maize].Harvest
              2014-09-10  [Maize].EndCrop
              2015-06-02  [Soybean].Sow(cultivar: Generic_MG2, population: 30, depth: 50, rowSpacing:750)
              2015-10-13  [Soybean].Harvest
              2015-10-13  [Soybean].EndCrop
              2016-04-15  [Fertiliser].Apply(29, Fertiliser.Types.UreaN, 50)
              2016-05-03  [SurfaceOrganicMatter].Incorporate(fraction: 0.01, depth: 150)
              2016-05-18  [Fertiliser].Apply(84, Fertiliser.Types.UreaN, 50)
              2016-05-18  [Maize].Sow(cultivar: Laila, population: 9.4, depth: 50, rowSpacing:760)
              2016-06-15  [Fertiliser].Apply(44, Fertiliser.Types.UreaN, 50)
              2016-10-11  [Maize].Harvest
              2016-10-11  [Maize].EndCrop
              2016-11-11  [SurfaceOrganicMatter].Incorporate(fraction: 0.01, depth: 150)
              2017-04-22  [SurfaceOrganicMatter].Incorporate(fraction: 0.01, depth: 150)
              2017-05-30  [Soybean].Sow(cultivar: Generic_MG2, population: 20, depth: 50, rowSpacing:760)
              2017-10-19  [Soybean].Harvest
              2017-10-19  [Soybean].EndCrop
              2018-05-03  [SurfaceOrganicMatter].Incorporate(fraction: 0.01, depth: 150)
              2018-05-16  [Fertiliser].Apply(80, Fertiliser.Types.UreaN, 50)
              2018-05-17  [Maize].Sow(cultivar: Laila, population: 8.6, depth: 50, rowSpacing:760)
              2018-06-18  [Fertiliser].Apply(115, Fertiliser.Types.UreaN, 50)
              2018-10-17  [Maize].Harvest
              2018-10-17  [Maize].EndCrop
              2018-11-11  [SurfaceOrganicMatter].Incorporate(fraction: 0.01, depth: 250)
              2019-04-14  [Fertiliser].Apply(30, Fertiliser.Types.NH4N, 50)
              2019-04-22  [SurfaceOrganicMatter].Incorporate(fraction: 0.01, depth: 250)
              2019-06-10  [Soybean].Sow(cultivar: Generic_MG2, population: 32, depth: 50, rowSpacing:760)
              2019-10-27  [Soybean].Harvest
              2019-10-27  [Soybean].EndCrop
            Fertiliser
            SurfaceOrganicMatter: InitialResidueName=soybean; InitialResidueType=soybean; InitialResidueMass=1400; InitialStandingFraction=0; InitialCPR=0; InitialCNR=36.5
            Soil SoilCobs: DataSource=CSIRO Sustainable Ecosystems, Toowoomba
              Comments=Soil naming structure: \State\Region\Classification-Local Name (Site/district and locator number); oc and ph estimated
              Physical: same as Validation.TileDrainageAndWaterTable.Systems 13 and 14.System_13.paddock.SoilCobs.Physical
              Organic: same as Validation.TileDrainageAndWaterTable.Systems 13 and 14.System_13.paddock.SoilCobs.Organic
              Chemical: same as Validation.TileDrainageAndWaterTable.Systems 13 and 14.System_13.paddock.SoilCobs.Chemical
              Water: FilledFromTop=false
                Thickness=[37, 38, 50, 90, 85, 100, 200, 300, 300, 320, 300, 280, 300, 300, 300, 300, 300, 300]
                InitialValues=[0.263, 0.296, 0.256, 0.254, 0.293, 0.252, 0.252, 0.296, 0.296, 0.296, 0.296, 0.274, 0.274, 0.274, 0.274, 0.274, 0.274, 0.274]
              Swim3 Swim: ersoil=1e-06; ernode=1e-06; slcerr=1e-06; Salb=0.13; CN2Bare=65; CNRed=20; CNCov=0.8; KDul=0.3; PSIDul=-300; VC=true; DTMax=60; MaxWaterIncrement=2; Diagnostics=false
                zero: PrecipitationInterception, DTMin, SpaceWeightingFactor, SoluteSpaceWeightingFactor, Dis, Disp, A, DTHC, DTHP, WaterTable
                SwimSubsurfaceDrain: DrainDepth=1070; DrainSpacing=13500; DrainRadius=52; Klat=1000; ImpermDepth=3900
              CERESSoilTemperature Temperature
              Nutrient
              Solute NO3: InitialValuesUnits=ppm; WaterTableConcentration=0; D0=0.05; Exco=[0, 0, 0, 0, 0, 0, 0, 0, 0, 0, 0, 0, 0, 0, 0, 0]; FIP=[1, 1, 1, 1, 1, 1, 1, 1, 1, 1, 1, 1, 1, 1, 1, 1]
                Thickness=[37, 38, 50, 90, 85, 100, 200, 300, 300, 320, 300, 280, 300, 300, 300, 300, 300, 300]
                InitialValues=[1.08108, 1.68421, 1.44, 1.95556, 2.72941, 2.66667, 1.48148, 0.644745, 0.214915, 0.342521, 0.365356, 0.194805, 0, 0.141414, 0.20202, 0.20202, 0.20202, 0.20202]
              Solute NH4: InitialValuesUnits=ppm; WaterTableConcentration=0; D0=0.05; Exco=[1, 1, 1, 1, 1, 1, 1, 1, 1, 1, 1, 1, 1, 1, 1, 1]; FIP=[1, 1, 1, 1, 1, 1, 1, 1, 1, 1, 1, 1, 1, 1, 1, 1]
                Thickness=[37, 38, 50, 90, 85, 100, 200, 300, 300, 320, 300, 280, 300, 300, 300, 300, 300, 300]
                InitialValues=[3.24324, 3.15789, 2.24, 0.533333, 0.470588, 3.11111, 1.51852, 0.945626, 0.881152, 0.0604449, 0.0214915, 0.17316, 0, 0.20202, 0.20202, 0.20202, 0.20202, 0.20202]
              Solute Urea: same as Validation.TileDrainageAndWaterTable.Systems 13 and 14.System_13.paddock.SoilCobs.Urea
            Plant maize: ResourceName=Maize
            Plant soybean: ResourceName=Soybean
            Report Outputfile: EventNames=[Clock].EndOfDay
              VariableNames:
                [Clock].Today
                ([Maize].AboveGround.Wt + [Soybean].AboveGround.Wt)*10 as CropBiomass
                ([Maize].Grain.Wt + [Soybean].Grain.Wt)*10 as CropYield
                [SurfaceOrganicMatter].Wt
                [SWIM].WaterTable
                [SWIM].SubsurfaceDrain
                [SWIM].SubsurfaceDrainNO3
                ([SWIM].SW[3]*0.5 + [SWIM].SW[4]*0.5) as SW_15cm
                ([SWIM].SW[6]*0.65 + [SWIM].SW[7]*0.35) as SW_45cm
                [SWIM].SW[12] as SW_200cm
                [SWIM].Drainage
                sum([SoilCobs].Nutrient.NO3.kgha[1:5]) as NO3_030cm
                sum([SoilCobs].Nutrient.NO3.kgha[6:7]) as NO3_3060cm
                sum([SWIM].SWmm[1:12]) as SW_02m
                Sum of [SWIM].SubsurfaceDrain from 1-Jan to 31-Dec as Annual_tile_drainage
                Sum of [SWIM].SubsurfaceDrainNO3 from 1-Jan to 31-Dec as Annual_tile_drainage_no3
                [Clock].Today.Year
                [Clock].Today.Month
                [Clock].Today.DayOfYear
  Simulation HowToSetAPotentialLowerBoundaryCondition
    Memo
      By default, if no action is taken, SWIM will use a gradient lower boundary condition and this is what will be used in most simulations - but there are exceptions.

      The "potential" boundary condition is when there is a set soil water potential at the base of the simulated soil. This can be negative, meaning that water will be constantly 'pulled' out of the lower layer by a suction.

      More often with this boundary condition it will be positive, meaning that there is a water table that is caused by external factors (i.e. not a perched water table caused by poor internal drainage) such as a regional water table. In these cases it is assumed that there is an infinite supply of water available to keep the soil water potential of the lower boundary at the user-prescribed value. To achieve this, water is continually added (or removed) from the soil to maintain the set potential.

      The value associated with the potential lower boundary condition is relative to the base of the simulated soil profile. If the simulated soil profile is 1000 mm deep and a potential of 250 mm is set for the lower boundary, then the water table will be 750 mm below the soil surface. If the soil profile was 1500 mm deep and the potential was still set at 250 mm then the water table would be at a depth of 1250 mm below the soil surface.

      The simulation below shows a simulation with a potential boundary condition set at 100 mm and a soil profile depth of 700 mm. You will see that the water table depth is 600 mm. You will also see that drainage out of the base of the soil profile can be either positive (downward) or negative (upward) with the latter being when the regional water table is replenishing water into the soil profile.
    Weather: FileName=..\..\Examples\WeatherFiles\lincoln.met
    Clock: Start=2000-01-01; End=2005-01-31
    Summary summaryfile
    SoilArbitrator
    MicroClimate: a_interception=0; b_interception=0; c_interception=0; d_interception=0; SoilHeatFluxFraction=0; MinimumHeightDiffForNewLayer=0; NightInterceptionFraction=0; ReferenceHeight=2
    Forages
      Parameters:
        Name                          IsLive  DigestibilityString  FractionConsumable  MinimumAmount  UseDigestibilityFromModel
        SurfaceOrganicMatter.Residue  true    0.7                  0                   100            false
        SurfaceOrganicMatter.Residue  false   0.3                  0                   0              false
        AGPRyegrass.Leaf              true    0.7                  1                   100            false
        AGPRyegrass.Leaf              false   0.3                  1                   0              false
        AGPRyegrass.Stem              true    0.7                  1                   100            false
        AGPRyegrass.Stem              false   0.3                  1                   0              false
        AGPRyegrass.Stolon            true    0.7                  1                   100            false
        AGPRyegrass.Stolon            false   0.3                  1                   0              false
        AGPWhiteClover.Leaf           true    0.7                  1                   100            false
        AGPWhiteClover.Leaf           false   0.3                  1                   0              false
        AGPWhiteClover.Stem           true    0.7                  1                   100            false
        AGPWhiteClover.Stem           false   0.3                  1                   0              false
        AGPWhiteClover.Stolon         true    0.7                  1                   100            false
        AGPWhiteClover.Stolon         false   0.3                  1                   0              false
    Zone paddock: Area=1; Slope=0; AspectAngle=0; Altitude=50
      Manager SWIM3_SetLowerBC
        LowerBCType = potential
        LowerBCValue = 100
```csharp
using Models.Climate;
using APSIM.Shared.Utilities;
using Models.Soils.Nutrients;
using Models.Soils;
using Models.PMF;
using Models.Core;
using System.Xml.Serialization;
using System;
using Models.AgPasture;
using Models.Interfaces;

namespace Models
{
    [Serializable] 
    [System.Xml.Serialization.XmlInclude(typeof(Model))]
    public class Script : Model
    {
        [Link] Clock clock;
        [Link] ISummary summary;
        [Link] private Swim3 swim;
        //[Link] private PastureSpecies ryegrass;
        //[Link] private SimpleGrazing grazing;
        
        public enum LowerBCTypeOptions {gradient,seepage,potential};

        [Separator("Sets the lower boundary condition type (and value if set to 'potential' for SWIM3. The change is applied at the beginning of the first day of the simulation.")]
        [Description("[Get a dropdown] What lower boundary condition is wanted?")] public LowerBCTypeOptions LowerBCType { get; set; }
        [Description("If 'potential', then what potential? Should be negative (mm) ")] public double LowerBCValue { get; set; }

        public double SoilWaterStart  { get; set; }
        public double SoilWaterEnd  { get; set; }

        [EventSubscribe("DoDailyInitialisation")]
        private void DoDailyInitialisation(object sender, EventArgs e)
        {
        }

        [EventSubscribe("DoReportCalculations")]
        private void DoReportCalculations(object sender, EventArgs e)
        {
        }

        [EventSubscribe("DoManagement")]
        private void DoDailyCalculations(object sender, EventArgs e)
        {
            if (clock.Today == clock.StartDate)
            {
                summary.WriteMessage(this, "Script is setting lower boundary condition to " + LowerBCType, MessageType.Diagnostic);
                if (LowerBCType == LowerBCTypeOptions.gradient)
                    swim.SetLowerBCForGradient(bbcGradient: 0.0);   // in cm/cm (ibbc=0) Note that this is the default setting
                else if (LowerBCType == LowerBCTypeOptions.potential)
                    swim.SetLowerBCForGivenPotential(bbcPotential: LowerBCValue /10.0 );    //  convert to cm (ibbc=1), DUL is -100 cm so values more positive will often result in inflow to the bottom of the soil profile. Input in mm so divide here.
                else if (LowerBCType == LowerBCTypeOptions.seepage)
                    swim.SetLowerBCForSeepage(bbcPotentialSeepage: 0.0);  // in cm (ibbc=3). This is for zero-tension lysimeters
                else
                    throw new Exception("Wrong lower boundary condition type");
            }
        }
    }
}
```
      Manager AutomaticIrrigation
        allowIrrigation = True
        seasonStart = 1-sep
        seasonEnd = 30-mar
        seasonsAllocation = 10000
        triggerDeficit = 80
        targetDeficit = 100
        returndays = 3
        maximumAmount = 30
        depthPAWC = 300
```csharp
using Newtonsoft.Json;
using APSIM.Shared.Utilities;
using System.Xml.Serialization;
using Models.Soils;
using Models.PMF;
using Models.Core;
using System;
using Models.Interfaces;



        
namespace Models
{
    [Serializable] 
    [System.Xml.Serialization.XmlInclude(typeof(Model))]
    public class Script : Model
    {
        [Link] private ISummary summary;
        [Link] private Irrigation Irrigation;
        [Link] private Clock Clock;
        [Link] private Soil Soil;
        [Link(IsOptional = true)] private IPlant existingCrop;
        private DateTime StartDate;
        private DateTime EndDate;
        private double TopDUL;
        private double TopLL;
        private int nLayers;
        [Link]
        private IPhysical soilPhysical;
        [Link]
        private ISoilWater waterBalance;
        //Communication to other modules
       
        //User inputs from properties tab
        [Description("Turn irrigation on?")]
        public bool allowIrrigation { get; set; }
        [Description("Start of irrigation season (dd-MMM)")]
        public string seasonStart { get; set; }
        [Description("End of irrigation season (dd-MMM)")]
        public string seasonEnd { get; set; }
        [Description("Season allocation (mm)")]
        public double seasonsAllocation { get; set; }
        [Description("Deficit to trigger irrigation (% PAWC)")]
        public double triggerDeficit { get; set; }
        [Description("Deficit to stop irrigaton (% PAWC)")]
        public double targetDeficit { get; set; }
        [Description("Minimum days for irrigation to return")]
        public double returndays { get; set; }
        [Description("Maximum irrigation application (mm/day)")]
        public double maximumAmount { get; set; }
        [Description("Depth to calculate PAWC (mm)")]
        public double depthPAWC { get; set; }

        //Class members
        [JsonIgnore] public double TopSWdeficit { get; set; }
        [JsonIgnore] public double TopSWC { get; set; }
        [JsonIgnore] public double DaysSinceIrrigation { get; set; }
        [JsonIgnore] public double AmountToApply { get; set; }
        [JsonIgnore] public double SeasonAppliedAmount { get; set; }
        
        private bool IrrigationIsAllowed { get; set; }
        private bool SeasonIsOpen { get; set; }
        private bool CropIsActive { get; set; }
        private bool IrrigatorIsAvailable { get; set; }
        private bool SoilIsDry { get; set; }

    
        //Calculate static soil variables
        [EventSubscribe("StartOfSimulation")]
        private void OnStartOfSimulation(object sender, EventArgs e)
        {   
            //Set the season dates
            StartDate = DateTime.Parse(seasonStart + "-" + Clock.Today.Year.ToString());
            EndDate = DateTime.Parse(seasonEnd + "-" + Clock.Today.Year.ToString());
            
            //Can we irrigate at all?
            IrrigationIsAllowed = false; 
            if (allowIrrigation)
                IrrigationIsAllowed = true; 

            //Calculate soil water variables
            double depthFromSurface = 0.0;
            double fracLayer = 0.0;
            nLayers = soilPhysical.Thickness.Length;
            for (int layer = 0; layer < nLayers; layer++)
            {
                fracLayer = Math.Min(1.0, (depthPAWC - depthFromSurface) / soilPhysical.Thickness[layer]);
                TopLL += soilPhysical.LL15mm[layer] * fracLayer;
                TopDUL += soilPhysical.DULmm[layer] * fracLayer;
                depthFromSurface += soilPhysical.Thickness[layer];
                if (depthFromSurface >= depthPAWC)
                    layer = nLayers;
            }
        }
             
        //Determine daily requirement for irrigation
        [EventSubscribe("StartOfDay")]
        private void OnStartOfDay(object sender, EventArgs e)
        {
            //Can we irrigate today?          
            SeasonIsOpen = isBetween(Clock.Today, StartDate, EndDate);
            if (!SeasonIsOpen)
                SeasonAppliedAmount = 0;

            //Is there a crop in the ground that needs irrigation?
            CropIsActive = false;
            if ((existingCrop != null) && (existingCrop.IsAlive))
                CropIsActive = true;
            //if ((existingCrop.Phenology.Stage >= 3.0) && (existingCrop.Phenology.Stage < 6.0))
          
            //Is the irrigator available?
            IrrigatorIsAvailable = false;
            DaysSinceIrrigation += 1;
            if (DaysSinceIrrigation >= returndays)
                IrrigatorIsAvailable = true;
          
            //Is the soil dry enough to require irrigation?
            SoilIsDry = false;
            double depthFromSurface = 0.0;
            double fracLayer = 0.0;
            TopSWC = 0.0;
            for (int layer = 0; layer < nLayers; layer++)
            //for (int layer = 0; depthFromSurface < depthPAWC + soilPhysical.Thickness[layer]; layer++)
            {
                fracLayer = Math.Min(1.0, (depthPAWC - depthFromSurface) / soilPhysical.Thickness[layer]);
                TopSWC += waterBalance.SWmm[layer] * fracLayer;
                depthFromSurface += soilPhysical.Thickness[layer];
                if (depthFromSurface >= depthPAWC)
                    layer = nLayers;
            }
            
            TopSWdeficit = TopSWC - TopDUL;
            if (Math.Max(0.0, -TopSWdeficit) >= (TopDUL - TopLL) * (100 - triggerDeficit) / 100)
                SoilIsDry = true;
                
            //Are all the conditions ratifying irrigation
            if (IrrigationIsAllowed && SeasonIsOpen && CropIsActive && IrrigatorIsAvailable && SoilIsDry)
            {
                //Lets bloody well irrigate then!!!!
                AmountToApply = TopDUL * targetDeficit / 100 - TopSWC;
                AmountToApply = Math.Max(0.0, Math.Min(AmountToApply, seasonsAllocation - SeasonAppliedAmount));
                AmountToApply = Math.Min(AmountToApply,maximumAmount);
                Irrigation.Apply(AmountToApply);
                DaysSinceIrrigation = 0;
                SeasonAppliedAmount += AmountToApply;
            }
        }
        
        ///Checks whether theDate is between iniDate and endDate (non-year specific)
        private bool isBetween(DateTime theDay, DateTime iniDate, DateTime endDate)
        {
            bool result = false;
            if (iniDate.DayOfYear < endDate.DayOfYear)
            {
                // period is within one year, ex: summer in the northern hemisphere
                if ((theDay.DayOfYear >= iniDate.DayOfYear) && (theDay.DayOfYear <= endDate.DayOfYear))
                    result = true;
            }
            else
            {
                // period goes over the end of the year, ex: summer in the southern hemisphere
                if ((theDay.DayOfYear >= iniDate.DayOfYear) || (theDay.DayOfYear <= endDate.DayOfYear))
                    result = true;
            }
            
            return result;
        }
    }
}
```
      Irrigation
      Fertiliser
      SurfaceOrganicMatter: InitialResidueName=grass; InitialResidueType=grass; InitialResidueMass=20; InitialStandingFraction=0; InitialCPR=0; InitialCNR=17
      Soil: Latitude=0; Longitude=0
        Physical
          Thickness  ParticleSizeClay  ParticleSizeSand  ParticleSizeSilt  Rocks  BD     AirDry  LL15   DUL    SAT   KS
          60         17.61             33.77             48.62             0      0.865  0.077   0.231  0.565  0.58  216
          110        17.61             33.77             48.62             0      0.865  0.077   0.231  0.565  0.58  216
          140        17.61             33.77             48.62             0      0.865  0.077   0.231  0.565  0.58  216
          240        17.61             33.77             48.62             0      0.865  0.077   0.231  0.565  0.58  216
          150        17.61             33.77             48.62             0      0.865  0.077   0.231  0.565  0.58  216
          SoilCrop AgPRyegrassSoil: LL=[0.231, 0.231, 0.231, 0.231, 0.231]; KL=[0.1, 0.1, 0.1, 0.1, 0]; XF=[1, 1, 1, 1, 0]
          SoilCrop AgPWhiteCloverSoil: LL=[0.231, 0.231, 0.231, 0, 0]; KL=[0.1, 0.1, 0.1, 0, 0]; XF=[1, 1, 1, 0, 0]
        Nutrient
        Organic: FOMCNRatio=40; CarbonUnits=Total
          Thickness  Carbon  SoilCNRatio  FBiom  FInert  FOM
          60         8.2     12.5         0.08   0.58    92.873
          110        5.5     12.5         0.02   0.7     57.963
          140        3.3     12.5         0.015  0.77    31.811
          240        1.7     12.5         0.01   0.9     11.373
          150        1.7     12.5         0.01   0.99    0
        Chemical: Thickness=[60, 110, 140, 240, 150]; PH=[6.5, 6.5, 6.5, 6.5, 6.5]; PHUnits=Water
        Water: Thickness=[60, 110, 140, 240, 150]; InitialValues=[0.565, 0.565, 0.565, 0.565, 0.565]; RelativeTo=LL15; FilledFromTop=false
        Swim3: PrecipitationInterception=0; ersoil=1e-06; ernode=1e-06; slcerr=1e-06; Salb=0.13; CN2Bare=50; CNRed=20; CNCov=0.8; KDul=1; PSIDul=-100; VC=true; DTMin=0; DTMax=60; MaxWaterIncrement=5; SpaceWeightingFactor=0; SoluteSpaceWeightingFactor=1; Dis=0; Disp=1; A=2; DTHC=0.1; DTHP=2; Diagnostics=false; WaterTable=0
        Solute Cl: InitialValuesUnits=ppm; WaterTableConcentration=0; D0=0.05
          Thickness  InitialValues  Exco  FIP
          60         0              0     1
          110        0              0     1
          140        0              0     1
          240        0              0     1
          150        0              0     1
        LayerStructure: Thickness=[10, 20, 30, 40, 50, 50, 50, 50, 100, 100, 50, 50, 50, 50]
        SoilTemperature
        Solute NO3: InitialValuesUnits=ppm; WaterTableConcentration=0; D0=0.05
          Thickness  InitialValues  Exco  FIP
          60         6.503          0     1
          110        2.101          0     1
          140        2.101          0     1
          240        1.701          0     1
          150        1.701          0     1
        Solute NH4: InitialValuesUnits=ppm; WaterTableConcentration=0; D0=0.05
          Thickness  InitialValues  Exco  FIP
          60         0.599          1     1
          110        0.1            1     1
          140        0.1            1     1
          240        0.1            1     1
          150        0.1            1     1
        Solute Urea: InitialValuesUnits=kg/ha; WaterTableConcentration=0; D0=0.05
          Thickness  InitialValues  Exco  FIP
          60         0              0     1
          110        0              0     1
          140        0              0     1
          240        0              0     1
          150        0              0     1
      SimpleGrazing: GrazingRotationType=0; SimpleGrazingFrequencyString=end of month; SimpleMinGrazable=0; SimpleGrazingResidual=1200; FlexibleGrazePostDM=0; FractionDefoliatedNToSoil=[90]; FractionExcretedNToDung=[0.4]; CNRatioDung=0; DepthUrineIsAdded=150; FractionPopulationDecline=0; TramplingOn=false; MaximumPropLitterMovedToSoil=0.1; PastureConsumedAtMaximumRateOfLitterRemoval=1200
      PastureSpecies AGPRyegrass: doyGermination=275; daysEmergenceToAnthesis=120; daysAnthesisToMaturity=85; degreesDayForAnthesis=1100; degreesDayForMaturity=900; daysAnnualsFactor=45; InitialShootDM=2500; InitialRootDM=500; InitialRootDepth=350; initialDMFractionsGrasses=[0.15, 0.25, 0.25, 0.05, 0.05, 0.1, 0.1, 0.05, 0, 0, 0]; initialDMFractionsForbs=[0.2, 0.2, 0.15, 0.05, 0.1, 0.15, 0.1, 0.05, 0, 0, 0]; PhotosyntheticEfficiency=0.01; PhotosynthesisCurveFactor=0.8; FractionPAR=0.5; ReferenceCO2=380; CO2EffectScaleFactor=700; CO2EffectOffsetFactor=600; CO2EffectMinimum=0.7; CO2EffectExponent=2; ReproSeasonDurationCoeff=2; ReproSeasonShouldersLengthFactor=1; ReproSeasonOnsetDurationFactor=0.6; RelativeTurnoverEmerging=2; DetachmentDroughtCoefficient=3; DetachmentDroughtEffectMin=0.1; TurnoverStockFactor=0.01; TurnoverDefoliationEffectMin=0.025; MinimumGreenLeafProp=0.8; MinimumGreenRootProp=0.5
        initialDMFractionsLegumes=[0.16, 0.23, 0.22, 0.05, 0.03, 0.05, 0.05, 0.01, 0.04, 0.08, 0.08]
        LinearInterpolationFunction FVPDFunction
      PastureSpecies AGPWhiteClover: doyGermination=275; daysEmergenceToAnthesis=120; daysAnthesisToMaturity=85; degreesDayForAnthesis=1100; degreesDayForMaturity=900; daysAnnualsFactor=45; InitialShootDM=500; InitialRootDM=250; InitialRootDepth=300; initialDMFractionsGrasses=[0.15, 0.25, 0.25, 0.05, 0.05, 0.1, 0.1, 0.05, 0, 0, 0]; initialDMFractionsForbs=[0.2, 0.2, 0.15, 0.05, 0.1, 0.15, 0.1, 0.05, 0, 0, 0]; PhotosyntheticEfficiency=0.01; PhotosynthesisCurveFactor=0.8; FractionPAR=0.5; ReferenceCO2=380; CO2EffectScaleFactor=700; CO2EffectOffsetFactor=600; CO2EffectMinimum=0.7; CO2EffectExponent=2; ReproSeasonDurationCoeff=2; ReproSeasonShouldersLengthFactor=1; ReproSeasonOnsetDurationFactor=0.6; RelativeTurnoverEmerging=2; DetachmentDroughtCoefficient=3; DetachmentDroughtEffectMin=0.1; TurnoverStockFactor=0.01; TurnoverDefoliationEffectMin=0.025; MinimumGreenLeafProp=0.8; MinimumGreenRootProp=0.5
        initialDMFractionsLegumes=[0.16, 0.23, 0.22, 0.05, 0.03, 0.05, 0.05, 0.01, 0.04, 0.08, 0.08]
        LinearInterpolationFunction FVPDFunction
      Report: EventNames=[Clock].EndOfDay
        VariableNames:
          [Clock].Today as Date
          [Soil].Swim3.Drainage as Drainage
          [Soil].Swim3.WaterTable as WaterTableDepth
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