Simulations: Version=141
  Memo Title page
    # APSIM Fodder Beet Model

    Khaembah E.N., Brown H.E., Zyskowski R., Chakwizira E., de Ruiter J.M., Teixeira E.I.

    The New Zealand Institute for Plant & Food Research Limited
    Private Bag 4704, Christchurch, New Zealand

    The APSIM Fodder Beet Model has been developed using the Plant Modelling Framework (PMF) of [brown_plant_2014]. This framework provides a library of plant organ and process submodels that can be coupled, at runtime, to construct a model in much the same way that models can be coupled to construct a simulation. This means that dynamic composition of lower level process and organ classes (e.g. photosynthesis, leaf) into larger constructions (e.g. maize, barley, sorghum) can be achieved by the model developer without additional coding.

    The model consists of:

    * A phenology model to simulate development between growth phases
    * A structure model to simulate plant morphology
    * A collection of organs to simulate the various plant parts
    * An arbitrator to allocate resources (N, biomass) to various plant organs.
  Replacements
    Report: EventNames=[Clock].DoReport
      VariableNames:
        [Clock].Today
        [FodderBeet].AboveGround.Wt
        [FodderBeet].AboveGround.N
        [FodderBeet].TotalDead.Wt
        [FodderBeet].TotalDead.N
        [FodderBeet].TotalDead.NConc
        [FodderBeet].Total.C
        [FodderBeet].Total.Wt*0.4 as TotalC
        [FodderBeet].TotalLive.Wt*0.4 as TotalLiveC
        [FodderBeet].TotalDead.Wt*0.4 as TotalDeadC
        [FodderBeet].Arbitrator.Nitrogen.TotalUptakeSupply
        [FodderBeet].Arbitrator.Nitrogen.TotalReAllocationSupply
        [FodderBeet].Arbitrator.Nitrogen.TotalReTranslocationSupply
        [FodderBeet].Arbitrator.Carbon.TotalFixationSupply
        [FodderBeet].Arbitrator.Carbon.TotalReAllocationSupply
        [FodderBeet].Arbitrator.Carbon.TotalReTranslocationSupply
        [FodderBeet].StorageRoot.Nitrogen.Demands.Total
        [FodderBeet].Leaf.Nitrogen.Demands.Total
        [FodderBeet].Petiole.Nitrogen.Demands.Total
        [FodderBeet].Root.Nitrogen.Demands.Total
        [FodderBeet].StorageRoot.Carbon.Demands.Total
        [FodderBeet].Leaf.Carbon.Demands.Total
        [FodderBeet].Petiole.Carbon.Demands.Total
        [FodderBeet].Root.Carbon.Demands.Total
        [FodderBeet].Leaf.Carbon.Supplies.Fixation
        [FodderBeet].Leaf.Photosynthesis
        [FodderBeet].Leaf.Photosynthesis.FT
        [Fertiliser].NitrogenApplied
        [FodderBeet].Leaf.Canopy.CoverDead
        [FodderBeet].Leaf.Canopy.CoverGreen
        [FodderBeet].Leaf.Canopy.CoverTotal
        [FodderBeet].Leaf.Canopy.Fw
        [FodderBeet].Leaf.Canopy.Height
        [FodderBeet].Leaf.Canopy.LAI
        [FodderBeet].Leaf.Canopy.Transpiration
        [FodderBeet].Leaf.Carbon.Demands.Total
        [FodderBeet].Leaf.Photosynthesis.RadnInt
        [FodderBeet].Leaf.Nitrogen.ConcentrationOrFraction.Metabolic
        [FodderBeet].Leaf.Dead.N
        [FodderBeet].Leaf.Dead.NConc
        [FodderBeet].Leaf.Dead.Nitrogen.Metabolic
        [FodderBeet].Leaf.Dead.Nitrogen.Storage
        [FodderBeet].Leaf.Dead.Nitrogen.Structural
        [FodderBeet].Leaf.Dead.Wt
        [FodderBeet].Leaf.DeltaLAI
        [FodderBeet].Leaf.Fn
        [FodderBeet].Leaf.FNmetabolic
        [FodderBeet].Leaf.Canopy.Fw
        [FodderBeet].Leaf.Live.N
        [FodderBeet].Leaf.Live.NConc
        [FodderBeet].Leaf.Live.Wt
        [FodderBeet].Leaf.Nitrogen.ConcentrationOrFraction.Storage
        [FodderBeet].Leaf.Nitrogen.ConcentrationOrFraction.Structural
        [FodderBeet].Leaf.NodeNumber
        [FodderBeet].Leaf.SpecificArea
        [FodderBeet].Petiole.Nitrogen.ConcentrationOrFraction.Metabolic
        [FodderBeet].Petiole.Dead.NConc
        [FodderBeet].Petiole.Live.N
        [FodderBeet].Petiole.Live.NConc
        [FodderBeet].Petiole.Live.Wt
        [FodderBeet].Petiole.Nitrogen.ConcentrationOrFraction.Storage
        [FodderBeet].Petiole.Nitrogen.ConcentrationOrFraction.Structural
        [FodderBeet].Petiole.NConc
        [FodderBeet].Phenology.AccumulatedThermalTime
        [FodderBeet].Phenology.CurrentPhase.Name
        [FodderBeet].Phenology.CurrentStageName
        [FodderBeet].Phenology.Photoperiod
        [FodderBeet].Phenology.Stage
        [FodderBeet].Phenology.ThermalTime
        [FodderBeet].Root.Nitrogen.ConcentrationOrFraction.Metabolic
        [FodderBeet].Root.Live.N
        [FodderBeet].Root.Live.NConc
        [FodderBeet].Root.Live.Wt
        [FodderBeet].Root.Dead.NConc
        [FodderBeet].Root.Nitrogen.ConcentrationOrFraction.Storage
        [FodderBeet].Root.Nitrogen.ConcentrationOrFraction.Structural
        [FodderBeet].Root.N
        [FodderBeet].Root.Nconc
        [FodderBeet].Root.Network.Depth
        [FodderBeet].Root.Network.WaterUptake
        //[FodderBeet].SCS
        [FodderBeet].SowingData.Cultivar
        [FodderBeet].StorageRoot.Nitrogen.ConcentrationOrFraction.Metabolic
        [FodderBeet].StorageRoot.Live.N
        [FodderBeet].StorageRoot.Live.NConc
        [FodderBeet].StorageRoot.Live.Wt
        [FodderBeet].StorageRoot.Nitrogen.ConcentrationOrFraction.Storage
        [FodderBeet].StorageRoot.Nitrogen.ConcentrationOrFraction.Structural
        [FodderBeet].StorageRoot.NConc
        [FodderBeet].StorageRoot.Wt
        //[FodderBeet].Total.N
        //[FodderBeet].Total.NConc
        //[FodderBeet].Total.Wt
        //[FodderBeet].TotalDead.N
        //[FodderBeet].TotalDead.NConc
        //[FodderBeet].TotalDead.Wt
        [Irrigation].IrrigationApplied
        [Phenology].Photoperiod
        [Soil].SoilWater.LeachNO3
        [Soil].SoilWater.SW
        [Soil].SoilWater.SWmm
        [SurfaceOrganicMatter].Wt
        [Weather].MeanT
        [Weather].Rain
        sum([Soil].SoilNitrogen.mineral_n) as ProfileN
        sum([Soil].SoilNitrogen.NO3.kgha) as TotalSoilNitrogen
        sum([Soil].SoilWater.SWmm) as ProfileWater
        [Soil].SoilNitrogen.mineral_n
        [FodderBeet].StorageRoot.Live.C + [FodderBeet].StorageRoot.Dead.C + [FodderBeet].Leaf.Live.C + [FodderBeet].Leaf.Dead.C + [FodderBeet].Root.Live.C + [FodderBeet].Root.Dead.C + [FodderBeet].Petiole.Live.C + [FodderBeet].Petiole.Dead.C as SumPlantC
    Plant FodderBeet: PlantType=FodderBeet; IsAlive=false; IsEnding=false; DaysAfterEnding=0
      BiomassArbitrator Arbitrator
        Memo
          The partitioning of biomass to fodder beet organs follows a "Relative Allocation" routine (see Arbitrator module documentation) guided by coefficients derived from the October sowing date data of the test dataset
        PlantPartitionFractions
          Constant StorageRootFraction: FixedValue=1
          Constant LeafFraction: FixedValue=0
          Constant PetioleFraction: FixedValue=0
          Constant RootFraction: FixedValue=0
        PlantNutrientsDelta Carbon
        PlantNutrientsDelta Nitrogen
      RootUptakesArbitrator
      Phenology
        Memo
          The fodder beet model is described for growth and dry matter production using solar radiation and temperature
          as driving functions. The effect of temperature is quantified using a thermal-time accumulation function.
          Thermal-time is calculated in degree days for ambient temperature above a base temperature (Tbase). Tbase is
          assumed to be 0°C ([Chakwizira_etal_2016a]).
        MultiplyFunction ThermalTime
          PhaseLookup
            PhaseLookupValue SoilTemperature: Start=Sowing; End=Germination
              Constant ThermalTime: FixedValue=15
              Memo
                The effect of soil temperature can go beyond germination as has been demonstrated in previous studies
                ([Stone_etal_1998]).
            PhaseLookupValue AirTemperature: Start=Germination; End=Maturity
              HourlyInterpolation ThermalTime: agregationMethod=0
                XYPairs Response: X=[0, 25, 30, 45]; Y=[0, 25, 25, 0]
                ThreeHourSin InterpolationMethod
              Memo
                Temperature is extrapolated to 3-hourly values from daily maximum and minimum using a sinusoidal function, and thermal-time accumulation is calculated for each period and combined to give daily values ([Jones_etal_1986]). The optimum temperature was set at 25–30°C with a maximum of 45°C, targets assumed similar to those of sugar beet reported by ([Ober_Rajabi_2010]) and ([Sanghera_etal_2016]).
          AddFunction DroughtPhenologyAcelleration
            Constant One: FixedValue=1
            MultiplyFunction Stress
              Constant StressResponseCoefficient: FixedValue=2
              LinearInterpolationFunction StressFactor
                XYPairs: X=[0, 1]; Y=[0, 0]
                VariableReference XValue: VariableName=[FodderBeet].Leaf.Canopy.Fw
        GerminatingPhase Germinating: Start=Sowing; End=Germination
        EmergingPhase Emerging: ShootLag=0; ShootRate=12.5; Start=Germination; End=Emergence; TTForTimeStep=0
          VariableReference ThermalTime: VariableName=[Phenology].ThermalTime
          Memo
            This is an empirical fit where 12.5°Cd per mm sowing depth is assumed based on the 2014 sowing date trial results ([Khaembah_etal_2017]).
        GenericPhase Vegetative: Start=Emergence; End=InitialReproductive
          VariableReference Progression: VariableName=[Phenology].ThermalTime
          MultiplyFunction Target
            LinearInterpolationFunction PhotoPeriodResponse
              XYPairs: X=[13, 16]; Y=[1, 1]
              VariableReference XValue: VariableName=[Phenology].Photoperiod
            Constant MaxThermalTimeToBolt: FixedValue=3000; Units=oCd
            Memo
              The effect of photoperiod on the vegetative phase is assumed neglible. The maximum TT of 3200°Cd based on the 2014 October sowing date data([Khaembah_etal_2017]) is used here.
        GenericPhase EarlyReproductive: Start=InitialReproductive; End=StartBolting
          Constant Target: FixedValue=1; Units=oCd
          Memo
            This an empirical fit - 400°Cd estimated from the 2014 sowing date trial ([Khaembah_etal_2017]).
          LinearInterpolationFunction Progression
            XYPairs: X=[13, 14]; Y=[0, 1]
            VariableReference XValue: VariableName=[Phenology].Photoperiod
        GenericPhase Bolt: Start=StartBolting; End=EndBolting
          VariableReference Progression: VariableName=[Phenology].ThermalTime
          Constant Target: FixedValue=800
          Memo
            The 800°Cd is is an empirical fit based on the 2014 sowing date trial ([Khaembah_etal_2017]).
        EndPhase Maturity: Start=EndBolting; End=Maturity
          Constant Target: FixedValue=15000
          VariableReference ThermalTime: VariableName=[Phenology].ThermalTime
          Memo
            This is estimated to be 3600°Cd
            A value of 3600°Cd (i.e. sum of °Cd from crop emergence to the end of the vegetative phase) is assumed for the duration of the “Maturity” phase. Accumulated thermal time (TTsum) for each phase (planted–vegetative) was empirically derived from the 2014 sowing date data ([Khaembah_etal_2017]).
        AccumulateFunction AccumulatedThermalTime: StartStageName=Emergence; EndStageName=Maturity; FractionRemovedOnCut=0; FractionRemovedOnHarvest=0; FractionRemovedOnGraze=0; FractionRemovedOnPrune=0
          VariableReference: VariableName=[Phenology].ThermalTime
        PhotoperiodFunction Photoperiod: Twilight=-6; DayLength=0
      Organ StorageRoot: Cconc=0.4; IsAboveGround=true; Fn=0; FNmetabolic=0
        OrganNutrientsState Live: Wt=0; C=0; N=0; P=0; K=0; NConc=0; PConc=0; KConc=0; Cconc=1
          NutrientPoolsState Weight: Structural=0; Storage=0; Metabolic=0; Total=0
          NutrientPoolsState Carbon: Structural=0; Storage=0; Metabolic=0; Total=0
          NutrientPoolsState Nitrogen: Structural=0; Storage=0; Metabolic=0; Total=0
          NutrientPoolsState Phosphorus: Structural=0; Storage=0; Metabolic=0; Total=0
          NutrientPoolsState Potassium: Structural=0; Storage=0; Metabolic=0; Total=0
        OrganNutrientsState Dead: same as Replacements.FodderBeet.StorageRoot.Live
        Constant InitialWt: FixedValue=0
        Respiration
          Constant MaintenanceRespirationFunction: FixedValue=0; Units=0-1
          NutrientFunctions AssimilationCostFunctions
            Constant C: FixedValue=0; Units=0-1
            Constant N: FixedValue=0; Units=0-1
            Constant P: FixedValue=0; Units=0-1
            Constant K: FixedValue=0; Units=0-1
          NutrientFunctions MobilisationCostFunctions: same as Replacements.FodderBeet.StorageRoot.Respiration.AssimilationCostFunctions
        Constant SenescenceRateFunction: FixedValue=0; Units=/d
        Constant DetachmentRateFunction: FixedValue=0; Units=/d
        OrganNutrientDelta Carbon: MaxCDelta=0
          OrganNutrientSupplies Supplies: Fixation=0; Uptake=0
            NutrientPoolsState ReAllocation: Structural=0; Storage=0; Metabolic=0; Total=0
            NutrientPoolsState ReTranslocation: Structural=0; Storage=0; Metabolic=0; Total=0
          NutrientDemandFunctions DemandFunctions
            DeficitDemandFunction Structural
            DeficitDemandFunction Metabolic
            DeficitDemandFunction Storage
            Constant QStructuralPriority: FixedValue=1
            Constant QMetabolicPriority: FixedValue=1
            Constant QStoragePriority: FixedValue=0
          NutrientProportionFunctions PoolFractions
            CalculateCarbonFractionFromNConc Structural
            CalculateCarbonFractionFromNConc Metabolic
            CalculateCarbonFractionFromNConc Storage
          NutrientSupplyFunctions SupplyFunctions
            Constant Fixation: FixedValue=0
            Constant Uptake: FixedValue=0
            NutrientPoolFunctions ReAllocation
              Constant Structural: FixedValue=0
              MobilisationSupplyFunction Metabolic
                Constant Multiplier: FixedValue=1
              MobilisationSupplyFunction Storage
                Constant Multiplier: FixedValue=1
            NutrientPoolFunctions ReTranslocation
              Constant Structural: FixedValue=0
              MobilisationSupplyFunction Metabolic
                Constant Multiplier: FixedValue=0
              MobilisationSupplyFunction Storage
                Constant Multiplier: FixedValue=0
        OrganNutrientDelta Nitrogen: MaxCDelta=0
          OrganNutrientSupplies Supplies: Fixation=0; Uptake=0
            NutrientPoolsState ReAllocation: Structural=0; Storage=0; Metabolic=0; Total=0
            NutrientPoolsState ReTranslocation: Structural=0; Storage=0; Metabolic=0; Total=0
          NutrientDemandFunctions DemandFunctions: same as Replacements.FodderBeet.StorageRoot.Carbon.DemandFunctions
          NutrientSupplyFunctions SupplyFunctions: same as Replacements.FodderBeet.StorageRoot.Carbon.SupplyFunctions
          NutrientConcentrationFunctions ConcFunctions
            LinearInterpolationFunction Maximum
              XYPairs: X=[0, 10, 40, 60]; Y=[0.02, 0.02, 0.01, 0.01]
              VariableReference XValue: VariableName=[Leaf].NodeNumber
              Memo
                These values have been fitted to the available data. The fitted values are within the observed maximum and minimum values obtained in the FACTS soybean experiments ([ARCHONTOULIS2020721]).
            Constant Critical: FixedValue=0.006
            Constant Minimum: FixedValue=0.004
        MultiplyFunction TotalDMDemand
          PhaseLookup PartitionFraction
            PhaseLookupValue NonReproductive: Start=Emergence; End=InitialReproductive
              LinearInterpolationFunction PartitionFraction
                XYPairs: X=[1, 6, 17, 20, 25]; Y=[0, 0, 1, 1, 1]
                Memo
                  Allocation determined by node number - partitioning coefficients have been determined using the 2014 sowing date October data ([Khaembah_etal_2017]).
                VariableReference XValue: VariableName=[Leaf].NodeNumber
            PhaseLookupValue Reproductive: Start=InitialReproductive; End=EndBolting
              Constant InitialWtFunction: FixedValue=0; Units=g/m^2
          VariableReference PotentialPhotosynthesis: VariableName=[Leaf].Photosynthesis
        BiomassRemoval BiomassRemovalDefaults
          OrganBiomassRemovalType Harvest: FractionLiveToRemove=0.95; FractionDeadToRemove=0; FractionLiveToResidue=0.05; FractionDeadToResidue=1
          OrganBiomassRemovalType Cut: FractionLiveToRemove=0; FractionDeadToRemove=0; FractionLiveToResidue=0; FractionDeadToResidue=0
          OrganBiomassRemovalType Prune: FractionLiveToRemove=0; FractionDeadToRemove=0; FractionLiveToResidue=0; FractionDeadToResidue=0
          OrganBiomassRemovalType Graze: FractionLiveToRemove=0.95; FractionDeadToRemove=0; FractionLiveToResidue=0.05; FractionDeadToResidue=1
          VariableReference CriticalNConc: VariableName=[StorageRoot].MinimumNConc
      Organ Leaf: Cconc=0.4; IsAboveGround=true; Fn=0; FNmetabolic=0
        OrganNutrientsState Live: same as Replacements.FodderBeet.StorageRoot.Live
        OrganNutrientsState Dead: same as Replacements.FodderBeet.StorageRoot.Live
        Constant InitialWt: FixedValue=1; Units=g/m2
        Respiration: same as Replacements.FodderBeet.StorageRoot.Respiration
        Constant 1SenescenceRateFunction: FixedValue=0
        AddFunction SenescenceRateFunction
          LinearInterpolationFunction CoverEffect
            XYPairs: X=[0, 0.9, 1]; Y=[0, 0, 0.005]
            Memo
              The maximum height of 500 mm was estimated from the 2014 sowing date trial ([Khaembah_etal_2017]).
            VariableReference XValue: VariableName=[Leaf].Canopy.CoverTotal
          LinearInterpolationFunction AgeEffect
            XYPairs: X=[0, 9, 12]; Y=[0, 0, 0.005]
            Memo
              The maximum height of 500 mm was estimated from the 2014 sowing date trial ([Khaembah_etal_2017]).
            VariableReference XValue: VariableName=[Leaf].NodeNumber
        Constant DetachmentRateFunction: FixedValue=0; Units=/d
        OrganNutrientDelta Carbon: MaxCDelta=0
          OrganNutrientSupplies Supplies: Fixation=0; Uptake=0
            NutrientPoolsState ReAllocation: Structural=0; Storage=0; Metabolic=0; Total=0
            NutrientPoolsState ReTranslocation: Structural=0; Storage=0; Metabolic=0; Total=0
          NutrientDemandFunctions DemandFunctions: same as Replacements.FodderBeet.StorageRoot.Carbon.DemandFunctions
          NutrientSupplyFunctions SupplyFunctions
            MultiplyFunction Fixation
              VariableReference Fixation: VariableName=[Leaf].Photosynthesis
              VariableReference Cconc: VariableName=[Leaf].Cconc
            Constant Uptake: FixedValue=0
            NutrientPoolFunctions ReAllocation
              Constant Structural: FixedValue=0
              MobilisationSupplyFunction Metabolic
                Constant Multiplier: FixedValue=1
              MobilisationSupplyFunction Storage
                Constant Multiplier: FixedValue=1
              MultiplyFunction Metabolic1
                Constant CrudeProteinFactor: FixedValue=0; Units=6.25
                VariableReference NitrogenReAllocation: VariableName=[Leaf].Nitrogen.Supplies.ReAllocation.Metabolic
              MultiplyFunction Storage1
                Constant CrudeProteinFactor: FixedValue=0; Units=6.25
                VariableReference NitrogenReAllocation: VariableName=[Leaf].Nitrogen.Supplies.ReAllocation.Metabolic
            NutrientPoolFunctions ReTranslocation: same as Replacements.FodderBeet.StorageRoot.Carbon.SupplyFunctions.ReTranslocation
          NutrientProportionFunctions PoolFractions
            CalculateCarbonFractionFromNConc Structural
            CalculateCarbonFractionFromNConc Metabolic
            CalculateCarbonFractionFromNConc Storage
        OrganNutrientDelta Nitrogen: MaxCDelta=0
          OrganNutrientSupplies Supplies: Fixation=0; Uptake=0
            NutrientPoolsState ReAllocation: Structural=0; Storage=0; Metabolic=0; Total=0
            NutrientPoolsState ReTranslocation: Structural=0; Storage=0; Metabolic=0; Total=0
          NutrientDemandFunctions DemandFunctions
            DeficitDemandFunction Structural
            DeficitDemandFunction Metabolic
            DeficitDemandFunction Storage
            Constant QStructuralPriority: FixedValue=1
            Constant QMetabolicPriority: FixedValue=1
            Constant QStoragePriority: FixedValue=0.5
          NutrientSupplyFunctions SupplyFunctions: same as Replacements.FodderBeet.StorageRoot.Carbon.SupplyFunctions
          NutrientConcentrationFunctions ConcFunctions
            LinearInterpolationFunction Maximum
              XYPairs: X=[0, 10, 40, 60]; Y=[0.045, 0.045, 0.035, 0.035]
              VariableReference XValue: VariableName=[Leaf].NodeNumber
              Memo
                These values have been fitted to the available data. The fitted values are within the observed maximum and minimum values obtained in the FACTS soybean experiments ([ARCHONTOULIS2020721]).
            Constant Critical: FixedValue=0.03
            Constant Minimum: FixedValue=0.025
        EnergyBalance Canopy: Albedo=0.2; Gsmax350=0.02; R50=150; KDead=0; LAIDead=0; Fw=0
          MinimumFunction FRGRer
            VariableReference RUE_FT: VariableName=[Leaf].Photosynthesis.FT
            MinimumFunction Others
              VariableReference RUE_FN: VariableName=[Leaf].Photosynthesis.FN
              VariableReference RUE_FVPD: VariableName=[Leaf].Photosynthesis.FVPD
          StomatalConductanceCO2Modifier
            VariableReference PhotosynthesisCO2Modifier: VariableName=[Leaf].Carbon.Photosynthesis.FCO2
          LinearInterpolationFunction Tallness
            XYPairs: X=[0, 24]; Y=[20, 500]
            Memo
              The maximum height of 500 mm was estimated from the 2014 sowing date trial ([Khaembah_etal_2017]).
            VariableReference XValue: VariableName=[Leaf].NodeNumber
          VariableReference Deepness: VariableName=[Leaf].Canopy.Height
          MultiplyFunction DeadAreaIndex
            VariableReference SLA: VariableName=[Leaf].SpecificArea
            VariableReference LeafDeadWt: VariableName=[Leaf].Dead.Wt
          MultiplyFunction GreenAreaIndex
            VariableReference SLA: VariableName=[Leaf].SpecificArea
            VariableReference LeafLiveWt: VariableName=[Leaf].Live.Wt
          MultiplyFunction GreenExtinctionCoefficient
            Constant PotentialExtinctionCoeff: FixedValue=0.74
              Memo
                The extinction coefficient value of 0.74 ([Chakwizira_etal_2016a]) was used.
            LinearInterpolationFunction WaterStress
              XYPairs: X=[0, 1]; Y=[0.5, 1]
              VariableReference XValue: VariableName=[FodderBeet].Leaf.Canopy.Fw
          Constant Wideness: FixedValue=0
          Constant DeadExtinctionCoefficient: FixedValue=0.2
        RUEModel Photosynthesis
          Constant RUE: FixedValue=2.2
          Constant FNconst: FixedValue=1
          Constant FVPD: FixedValue=1
          LinearInterpolationFunction FW
            XYPairs: X=[0, 1, 1]; Y=[0, 1, 1]
            VariableReference XValue: VariableName=[Leaf].Canopy.Fw
          WeightedTemperatureFunction FT: MaximumTemperatureWeighting=0.75
            XYPairs: X=[0, 15, 26, 45]; Y=[0.1, 1, 1, 0.1]
          RUECO2Function FCO2: PhotosyntheticPathway=C3
          VariableReference RadnInt: VariableName=[Leaf].Canopy.RadiationIntercepted
          LinearInterpolationFunction FN
            XYPairs: X=[0, 1, 1.5]; Y=[0, 1, 1]
            VariableReference XValue: VariableName=[Leaf].FNmetabolic
        DivideFunction TotalDMDemand
          VariableReference DeltaLAI: VariableName=[Leaf].DeltaLAI
          VariableReference SLA: VariableName=[Leaf].SpecificArea
          Memo
            Growth in leaf area is used to calculate the leaf dry matter demand. The same was assumed in the original crop models in APSIM. Further model development can be taken once new experimental data for metabolic, structural and storage forms are provided.
          Memo Memo1
            DeltaLAI describes the LAI variation over the cycle and is calculated using the Area of Largest Leaf, relative leaf area, plant number, branch number and leaf appearance rate (thermal time/phyllochron).
        PhaseLookup DeltaLAI
          Memo
            DeltaLAI describes the LAI variation over the cycle and is calculated using the Area of Largest Leaf, relative leaf area, plant number, branch number and leaf appearance rate (thermal time/phyllochron).
          PhaseLookupValue Vegetative: Start=Emergence; End=StartBolting
            MultiplyFunction Delta
              VariableReference AreaLargestLeaf: VariableName=[Leaf].AreaLargestLeaf
              LinearInterpolationFunction RelativeArea
                XYPairs: X=[1, 20, 30, 45, 50]; Y=[0.05, 1, 1, 1, 1]
                VariableReference XValue: VariableName=[Leaf].NodeNumber
              VariableReference PlantNumber: VariableName=[FodderBeet].SowingData.Population
              DivideFunction LAR
                VariableReference TT: VariableName=[Phenology].ThermalTime
                VariableReference Phyllochron: VariableName=[Leaf].Phyllochron
              LinearInterpolationFunction FW
                XYPairs: X=[0.5, 1, 1.1]; Y=[0, 1, 1]
                VariableReference XValue: VariableName=[Leaf].Canopy.Fw
          PhaseLookupValue Reproductive: Start=StartBolting; End=EndBolting
            Constant: FixedValue=0
        AccumulateFunction NodeNumber: StartStageName=Emergence; EndStageName=EndBolting; FractionRemovedOnCut=0; FractionRemovedOnHarvest=0; FractionRemovedOnGraze=0; FractionRemovedOnPrune=0
          DivideFunction DeltaNode
            VariableReference ThermalTime: VariableName=[Phenology].ThermalTime
            VariableReference Phyllochron: VariableName=[Leaf].Phyllochron
        PhaseLookupValue Phyllochron: Start=Emergence; End=EndBolting
          LinearInterpolationFunction Phyllochron
            XYPairs: X=[1, 3, 3.1]; Y=[100, 100, 50]
            VariableReference XValue: VariableName=[Leaf].NodeNumber
          Memo
            A two stage phyllochron (i.e. 100–50°Cd) is an empirical fit to get faster leaf appearance of the first 3 leaves. The
            50°Cd for the fourth and later-formed leaves is estimated from measured values of the 2014-2015 October sowing date treatment ([Khaembah_etal_2017]).
        MultiplyFunction SpecificArea
          LinearInterpolationFunction UnStressedSpecificArea
            XYPairs: X=[0, 40]; Y=[0.015, 0.02]
            VariableReference XValue: VariableName=[Leaf].NodeNumber
          MovingAverageFunction AccumulatedWaterStressEffect: NumberOfDays=30; StageToStartMovingAverage=Emergence
            VariableReference FW: VariableName=[Leaf].Canopy.Fw
        Constant AreaLargestLeaf: FixedValue=0.025
        BiomassRemoval BiomassRemovalDefaults
          OrganBiomassRemovalType Harvest: FractionLiveToRemove=0; FractionDeadToRemove=0; FractionLiveToResidue=1; FractionDeadToResidue=1
          OrganBiomassRemovalType Cut: FractionLiveToRemove=0; FractionDeadToRemove=0; FractionLiveToResidue=1; FractionDeadToResidue=1
        LinearInterpolationFunction FrostFraction
          XYPairs: X=[-4, 4]; Y=[0, 0]
          VariableReference XValue: VariableName=[Weather].MinT
      Organ Petiole: Cconc=0.4; IsAboveGround=true; Fn=0; FNmetabolic=0
        OrganNutrientsState Live: same as Replacements.FodderBeet.StorageRoot.Live
        OrganNutrientsState Dead: same as Replacements.FodderBeet.StorageRoot.Live
        Constant InitialWt: FixedValue=1; Units=g/m2
        Respiration: same as Replacements.FodderBeet.StorageRoot.Respiration
        VariableReference SenescenceRateFunction: VariableName=[Leaf].senescenceRate
        Constant DetachmentRateFunction: FixedValue=0; Units=/d
        OrganNutrientDelta Carbon: MaxCDelta=0
          OrganNutrientSupplies Supplies: Fixation=0; Uptake=0
            NutrientPoolsState ReAllocation: Structural=0; Storage=0; Metabolic=0; Total=0
            NutrientPoolsState ReTranslocation: Structural=0; Storage=0; Metabolic=0; Total=0
          NutrientDemandFunctions DemandFunctions
            DeficitDemandFunction Structural
            DeficitDemandFunction Metabolic
            DeficitDemandFunction Storage
            Constant QStructuralPriority: FixedValue=0
            Constant QMetabolicPriority: FixedValue=0
            Constant QStoragePriority: FixedValue=0
          NutrientSupplyFunctions SupplyFunctions: same as Replacements.FodderBeet.StorageRoot.Carbon.SupplyFunctions
          NutrientProportionFunctions PoolFractions
            CalculateCarbonFractionFromNConc Structural
            CalculateCarbonFractionFromNConc Metabolic
            CalculateCarbonFractionFromNConc Storage
        OrganNutrientDelta Nitrogen: MaxCDelta=0
          OrganNutrientSupplies Supplies: Fixation=0; Uptake=0
            NutrientPoolsState ReAllocation: Structural=0; Storage=0; Metabolic=0; Total=0
            NutrientPoolsState ReTranslocation: Structural=0; Storage=0; Metabolic=0; Total=0
          NutrientDemandFunctions DemandFunctions: same as Replacements.FodderBeet.StorageRoot.Carbon.DemandFunctions
          NutrientSupplyFunctions SupplyFunctions: same as Replacements.FodderBeet.StorageRoot.Carbon.SupplyFunctions
          NutrientConcentrationFunctions ConcFunctions
            LinearInterpolationFunction Maximum
              XYPairs: X=[-, 0, 40, 60]; Y=[-, 0.015, 0.02, 0.02]
              VariableReference XValue: VariableName=[Leaf].NodeNumber
              Memo
                These values have been fitted to the available data. The fitted values are within the observed maximum and minimum values obtained in the FACTS soybean experiments ([ARCHONTOULIS2020721]).
            Constant Critical: FixedValue=0.013
            Constant Minimum: FixedValue=0.01
        AllometricDemandFunction TotalDMDemand: Const=1; Power=1
          VariableReference XValue: VariableName=[Leaf].Live.Wt
          VariableReference YValue: VariableName=[Petiole].Live.Wt
        BiomassRemoval BiomassRemovalDefaults
          OrganBiomassRemovalType Harvest: FractionLiveToRemove=0; FractionDeadToRemove=0; FractionLiveToResidue=1; FractionDeadToResidue=1
          OrganBiomassRemovalType Cut: FractionLiveToRemove=0.8; FractionDeadToRemove=0; FractionLiveToResidue=0; FractionDeadToResidue=0
          OrganBiomassRemovalType Prune: FractionLiveToRemove=0; FractionDeadToRemove=0; FractionLiveToResidue=0.6; FractionDeadToResidue=0
          OrganBiomassRemovalType Graze: FractionLiveToRemove=0.95; FractionDeadToRemove=0.95; FractionLiveToResidue=0.05; FractionDeadToResidue=0.05
      Organ Root: Cconc=0.4; IsAboveGround=false; Fn=0; FNmetabolic=0
        OrganNutrientsState Live: same as Replacements.FodderBeet.StorageRoot.Live
        OrganNutrientsState Dead: same as Replacements.FodderBeet.StorageRoot.Live
        Constant InitialWt: FixedValue=0.5; Units=g/m2
        Respiration: same as Replacements.FodderBeet.StorageRoot.Respiration
        VariableReference SenescenceRateFunction: VariableName=[Leaf].SenescenceRate
        Constant DetachmentRateFunction: FixedValue=0; Units=/d
        OrganNutrientDelta Carbon: same as Replacements.FodderBeet.Petiole.Carbon
        OrganNutrientDelta Nitrogen: MaxCDelta=0
          OrganNutrientSupplies Supplies: Fixation=0; Uptake=0
            NutrientPoolsState ReAllocation: Structural=0; Storage=0; Metabolic=0; Total=0
            NutrientPoolsState ReTranslocation: Structural=0; Storage=0; Metabolic=0; Total=0
          NutrientDemandFunctions DemandFunctions
            DeficitDemandFunction Structural
            DeficitDemandFunction Storage
            DeficitDemandFunction Metabolic
            Constant QStructuralPriority: FixedValue=1
            Constant QMetabolicPriority: FixedValue=1
            Constant QStoragePriority: FixedValue=0
          NutrientSupplyFunctions SupplyFunctions: same as Replacements.FodderBeet.StorageRoot.Carbon.SupplyFunctions
          NutrientConcentrationFunctions ConcFunctions
            Constant Maximum: FixedValue=0.01
            Constant Critical: FixedValue=0.009
            Constant Minimum: FixedValue=0.0045
        RootNetwork Network
          RootShapeCylinder RootShape
          LinearInterpolationFunction KLModifier
            XYPairs: X=[0, 1]; Y=[1, 1]
            VariableReference XValue: VariableName=[Root].Network.LengthDensity
          Constant SoilWaterEffect: FixedValue=1
          Constant MaximumRootDepth: FixedValue=1400
          PhaseLookup RootFrontVelocity
            PhaseLookupValue: Start=Germination; End=StartBolting
              Constant: FixedValue=10
          Constant KNO3: FixedValue=0.02; Units=g/plant
          Constant KNH4: FixedValue=0.01; Units=g/plant
          LinearInterpolationFunction NUptakeSWFactor
            XYPairs: X=[0, 1]; Y=[1, 1]
            VariableReference XValue: VariableName=[Root].Network.RWC
          Constant SpecificRootLength: FixedValue=40; Units=m/g
          LinearInterpolationFunction MaxDailyNUptake
            XYPairs: X=[0, 1000]; Y=[0, 100]
            Memo
              Early growth N uptake is assumed to be 0.1 kg N/ha/day, and this increases with root growth reaching a maximumof 5.8 kg N/ha/day. The maximum N uptake per day is assumed from sugar beet data (Armstrong et al., 1986).
            VariableReference XValue: VariableName=[Root].Wt
          Constant RootDepthStressFactor: FixedValue=1
        AllometricDemandFunction TotalDMDemand: Const=1; Power=1
          VariableReference XValue: VariableName=[Leaf].Live.Wt
          VariableReference YValue: VariableName=[Root].Live.Wt
        BiomassRemoval BiomassRemovalDefaults: same as Replacements.FodderBeet.Petiole.BiomassRemovalDefaults
      CompositeStates AboveGround: Wt=0; C=0; N=0; P=0; K=0; NConc=0; PConc=0; KConc=0; Cconc=1
        Propertys=[[Leaf].Live, [Leaf].Dead, [StorageRoot].Live, [StorageRoot].Dead, [Petiole].Live, [Petiole].Dead]
        NutrientPoolsState Weight: Structural=0; Storage=0; Metabolic=0; Total=0
        NutrientPoolsState Carbon: Structural=0; Storage=0; Metabolic=0; Total=0
        NutrientPoolsState Nitrogen: Structural=0; Storage=0; Metabolic=0; Total=0
        NutrientPoolsState Phosphorus: Structural=0; Storage=0; Metabolic=0; Total=0
        NutrientPoolsState Potassium: Structural=0; Storage=0; Metabolic=0; Total=0
      CompositeStates BelowGround: Propertys=[[Root].Live, [Root].Dead]; Wt=0; C=0; N=0; P=0; K=0; NConc=0; PConc=0; KConc=0; Cconc=1
        NutrientPoolsState Weight: Structural=0; Storage=0; Metabolic=0; Total=0
        NutrientPoolsState Carbon: Structural=0; Storage=0; Metabolic=0; Total=0
        NutrientPoolsState Nitrogen: Structural=0; Storage=0; Metabolic=0; Total=0
        NutrientPoolsState Phosphorus: Structural=0; Storage=0; Metabolic=0; Total=0
        NutrientPoolsState Potassium: Structural=0; Storage=0; Metabolic=0; Total=0
      CompositeStates Total: Wt=0; C=0; N=0; P=0; K=0; NConc=0; PConc=0; KConc=0; Cconc=1
        Propertys=[[Leaf].Live, [Leaf].Dead, [StorageRoot].Live, [StorageRoot].Dead, [Petiole].Live, [Petiole].Dead, [Root].Live, [Root].Dead]
        NutrientPoolsState Weight: Structural=0; Storage=0; Metabolic=0; Total=0
        NutrientPoolsState Carbon: Structural=0; Storage=0; Metabolic=0; Total=0
        NutrientPoolsState Nitrogen: Structural=0; Storage=0; Metabolic=0; Total=0
        NutrientPoolsState Phosphorus: Structural=0; Storage=0; Metabolic=0; Total=0
        NutrientPoolsState Potassium: Structural=0; Storage=0; Metabolic=0; Total=0
      CompositeStates TotalLive: Wt=0; C=0; N=0; P=0; K=0; NConc=0; PConc=0; KConc=0; Cconc=1
        Propertys=[[Leaf].Live, [Petiole].Live, [StorageRoot].Live, [Root].Live]
        NutrientPoolsState Weight: Structural=0; Storage=0; Metabolic=0; Total=0
        NutrientPoolsState Carbon: Structural=0; Storage=0; Metabolic=0; Total=0
        NutrientPoolsState Nitrogen: Structural=0; Storage=0; Metabolic=0; Total=0
        NutrientPoolsState Phosphorus: Structural=0; Storage=0; Metabolic=0; Total=0
        NutrientPoolsState Potassium: Structural=0; Storage=0; Metabolic=0; Total=0
      CompositeStates TotalDead: Wt=0; C=0; N=0; P=0; K=0; NConc=0; PConc=0; KConc=0; Cconc=1
        Propertys=[[Leaf].Dead, [Petiole].Dead, [StorageRoot].Dead, [Root].Dead]
        NutrientPoolsState Weight: Structural=0; Storage=0; Metabolic=0; Total=0
        NutrientPoolsState Carbon: Structural=0; Storage=0; Metabolic=0; Total=0
        NutrientPoolsState Nitrogen: Structural=0; Storage=0; Metabolic=0; Total=0
        NutrientPoolsState Phosphorus: Structural=0; Storage=0; Metabolic=0; Total=0
        NutrientPoolsState Potassium: Structural=0; Storage=0; Metabolic=0; Total=0
      LinearInterpolationFunction MortalityRate
        XYPairs: X=[0.98, 1]; Y=[0, 0]
        VariableReference XValue: VariableName=[Leaf].Canopy.CoverGreen
      AddFunction SCS (disabled)
        VariableReference Storage: VariableName=[StorageRoot].Live.Weight.Storage
        VariableReference Metabolic: VariableName=[StorageRoot].Live.Weight.Metabolic
        Memo
          Non structural carbohydrates and sugars
      CultivarFolder Cultivars
        Cultivar Brigadier
        Cultivar Rivage
        Cultivar Jamon: Command=[Fodderbeet].Phenology.Emerging.Target.FixedValue = 1000
        Cultivar Minotaure
  Experiment LincolnRS20161
    DisabledSimNames=[LincolnRS20161IrrNilNit300, LincolnRS20161IrrNilNit50, LincolnRS20161IrrFullNit50, LincolnRS20161IrrNilNit0, LincolnRS20161IrrFullNit0]
    Factors
      Permutation
        Factor Irr
          CompositeFactor Full
            Specifications:
              [Irrig]
              [StateFactors].Script.IrrFactor = true
            Operations Full
              2016-09-02  [Irrigation].Apply(25);
              2016-10-25  [Irrigation].Apply(5);
              2016-10-28  [Irrigation].Apply(5);
              2016-11-17  [Irrigation].Apply(5);
              2016-11-23  [Irrigation].Apply(30);
              2016-11-30  [Irrigation].Apply(0);
              2016-12-07  [Irrigation].Apply(25);
              2016-12-21  [Irrigation].Apply(25);
              2016-12-29  [Irrigation].Apply(30);
              2017-01-04  [Irrigation].Apply(40);
              2017-01-11  [Irrigation].Apply(32.9);
              2017-01-18  [Irrigation].Apply(25.4);
              2017-01-25  [Irrigation].Apply(31.3);
              2017-02-08  [Irrigation].Apply(33);
              2017-02-15  [Irrigation].Apply(35);
              2017-02-22  [Irrigation].Apply(29);
              2017-02-15  [Irrigation].Apply(35);
              2017-02-22  [Irrigation].Apply(29);
              2017-03-01  [Irrigation].Apply(32.6);
              2017-03-08  [Irrigation].Apply(34);
              2017-03-15  [Irrigation].Apply(0);
              2017-03-22  [Irrigation].Apply(50);
              2017-03-29  [Irrigation].Apply(0);
              2017-04-05  [Irrigation].Apply(0);
              2017-04-12  [Irrigation].Apply(30.9);
              2017-04-27  [Irrigation].Apply(18.9);
              Memo
                Have added an extra irrigation, on 22 Oct,

                Data indcates water applied but no notes of it RFZ

                In Statefactors have donethe irrigations for
                  17/12  21/1 19/11 14/1
          CompositeFactor Nil
            Specifications:
              [Irrig]
              [StateFactors].Script.IrrFactor = false
            Operations Nil
              2016-09-02  [Irrigation].Apply(20)
              2016-10-25  [Irrigation].Apply(5)
              2017-01-18  [Irrigation].Apply(5)
              2017-02-25  [Irrigation].Apply(5)
              2017-05-21  [Irrigation].Apply(50)
              Memo
                Have added an extra irrigation, on 3 Nov,

                Data indcates water applied but no notes of it RFZ
        Factor Nit
          CompositeFactor 0
            Specifications:
              [Fert]
              [StateFactors].Script.NitFactor = 0
            Operations 0
              2016-10-29  [Fertiliser].Apply(0, Fertiliser.Types.NO3N, 10);
              2017-01-18  [Fertiliser].Apply(0, Fertiliser.Types.NO3N, 10);
              2017-02-25  [Fertiliser].Apply(0, Fertiliser.Types.NO3N, 10);
              Memo
                Uniques fertigation event
          CompositeFactor 50
            Specifications:
              [Fert]
              [StateFactors].Script.NitFactor = 50
            Operations 50
              2016-10-29  [Fertiliser].Apply(25, Fertiliser.Types.NO3N, 10);
              2017-01-18  [Fertiliser].Apply(25, Fertiliser.Types.NO3N, 10);
              2017-02-25  [Fertiliser].Apply(0, Fertiliser.Types.NO3N, 10);
          CompositeFactor 300
            Specifications:
              [Fert]
              [StateFactors].Script.NitFactor = 300
            Operations 300
              2016-10-29  [Fertiliser].Apply(100, Fertiliser.Types.NO3N, 10);
              2017-01-18  [Fertiliser].Apply(100, Fertiliser.Types.NO3N, 10);
              2017-02-25  [Fertiliser].Apply(100, Fertiliser.Types.NO3N, 10);
    Simulation Rainsheltertest
      Clock: Start=2016-10-09; End=2017-05-18
      Summary summaryfile
      Weather
        FileName=C:\GitHubRepos\ApsimX\Tests\Validation\FodderBeet\lincoln.met
      SoilArbitrator Soil Arbitrator
      Zone paddock: Area=1; Slope=0; AspectAngle=0; Altitude=50
        Plant FodderBeet
        Folder Manager folder
          Operations GeneralIrrigation
            2016-09-02  [Irrigation].Apply(25.0);
            2016-10-25  [Irrigation].Apply(5.0);
            2016-10-28  [Irrigation].Apply(5.0);
          Operations Irrig
          Operations Fert
            2016-10-29  [Fertiliser].Apply(100, Fertiliser.Types.UreaN, 10);
            2017-01-18  [Fertiliser].Apply(100, Fertiliser.Types.UreaN, 10);
            2017-02-25  [Fertiliser].Apply(100, Fertiliser.Types.UreaN, 10);
          Operations Testing
          Manager ClimateControl
            StartDate = 10/17/2016 00:00:00
            EndDate = 05/20/2017 00:00:00
```csharp
using Models.Climate;
using System;
using Models.Core;
using APSIM.Shared.Utilities;
using System.Collections.Generic;
using System.Text;
using Models.PMF;
using Models;
using System.Xml.Serialization;

namespace Models
{
    [Serializable] 
    [System.Xml.Serialization.XmlInclude(typeof(Model))]
    public class Script : Model
    {
        [Link] Weather Met;
        [Link] Clock Clock;
    
        [Description("Start Date")]
        public DateTime StartDate { get; set; }
        
        [Description("End Date")]
        public DateTime EndDate { get; set; }
 
    
        [EventSubscribe("PreparingNewWeatherData")]
        private void OnPreparingNewWeatherData(object sender, EventArgs e)
        {
            if ((Clock.Today.Date >= StartDate) && (Clock.Today.Date <= EndDate))
                Met.Rain = 0;        
        }
    }
}
```
          Manager StateFactors
            IrrFactor = False
            NitFactor = 0
```csharp
using Models.Interfaces;
using System;
using Models.Core;
using System.Collections.Generic;
using System.Text;
using Models.Soils;
using Models.PMF;
using Models;
using System.Xml.Serialization;
using APSIM.Shared.Utilities;

namespace Models
{
    [Serializable] 
    public class Script : Model
    {
        [Link] private Clock Clock;
        [Link] private Irrigation Irrigation;
        [Link] private Fertiliser Fert;
        [Link] private Soil ThisSoil;
        [Link]
        private IPhysical soilPhysical;
        [Link]
        private ISoilWater waterBalance;
        [Description("Amount of Irrgation be applied 0/1")]
        public bool IrrFactor { get; set; }
        [Description("Amount of fertiliser to be applied (kg/ha)")]
        public double NitFactor { get; set; }
        
          
        private void SetSoilLayers()
        {
            /*
            Not used yrt use whenmore detailed info is known
            */
            int i = 0;
            if ((IrrFactor == false) && (NitFactor == 0))
            {
                if (soilPhysical.Thickness.Length != 7)
                {
                    throw new Exception("Soil layer exception");
                }
             
                soilPhysical.LL15[0] = 0.06;
                soilPhysical.LL15[1] = 0.06;
                soilPhysical.LL15[2] = 0.08;
                soilPhysical.LL15[3] = 0.14;
                soilPhysical.LL15[4] = 0.16;
                soilPhysical.LL15[5] = 0.16;
                soilPhysical.LL15[6] = 0.11;
                soilPhysical.DUL[0] = 0.34;
                soilPhysical.DUL[1] = 0.3;
                soilPhysical.DUL[2] = 0.28;
                soilPhysical.DUL[3] = 0.3;
                soilPhysical.DUL[4] = 0.3;
                soilPhysical.DUL[5] = 0.30;
                soilPhysical.DUL[6] = 0.3;
                soilPhysical.SAT[0] = 0.4;
                soilPhysical.SAT[1] = 0.4;
                soilPhysical.SAT[2] = 0.4;
                soilPhysical.SAT[3] = 0.4;
                soilPhysical.SAT[4] = 0.4;
                soilPhysical.SAT[5] = 0.4;
                soilPhysical.SAT[6] = 0.4;
                waterBalance.Reset();
            }   
            if ((IrrFactor == false) && (NitFactor == 50))
            {
                if (soilPhysical.Thickness.Length != 7)
                {
                    throw new Exception("Soil layer exception");
                }
             
                soilPhysical.LL15[0] = 0.07;
                soilPhysical.LL15[1] = 0.12;
                soilPhysical.LL15[2] = 0.17;
                soilPhysical.LL15[3] = 0.20;
                soilPhysical.LL15[4] = 0.26;
                soilPhysical.LL15[5] = 0.32;
                soilPhysical.LL15[6] = 0.30;
                soilPhysical.DUL[0] = 0.30;
                soilPhysical.DUL[1] = 0.26;
                soilPhysical.DUL[2] = 0.29;
                soilPhysical.DUL[3] = 0.25;
                soilPhysical.DUL[4] = 0.29;
                soilPhysical.DUL[5] = 0.34;
                soilPhysical.DUL[6] = 0.30;
                soilPhysical.SAT[0] = 0.34;
                soilPhysical.SAT[1] = 0.34;
                soilPhysical.SAT[2] = 0.34;
                soilPhysical.SAT[3] = 0.34;
                soilPhysical.SAT[4] = 0.34;
                soilPhysical.SAT[5] = 0.34;
                soilPhysical.SAT[6] = 0.34;
                waterBalance.Reset();
            }   
            if ((IrrFactor == false) && (NitFactor == 50))
            {
                if (soilPhysical.Thickness.Length != 7)
                {
                    throw new Exception("Soil layer exception");
                }
             
                soilPhysical.LL15[0] = 0.06;
                soilPhysical.LL15[1] = 0.11;
                soilPhysical.LL15[2] = 0.21;
                soilPhysical.LL15[3] = 0.18;
                soilPhysical.LL15[4] = 0.23;
                soilPhysical.LL15[5] = 0.30;
                soilPhysical.LL15[6] = 0.26;
                soilPhysical.DUL[0] = 0.25;
                soilPhysical.DUL[1] = 0.26;
                soilPhysical.DUL[2] = 0.30;
                soilPhysical.DUL[3] = 0.27;
                soilPhysical.DUL[4] = 0.34;
                soilPhysical.DUL[5] = 0.27;
                soilPhysical.DUL[6] = 0.30;
                soilPhysical.SAT[0] = 0.34;
                soilPhysical.SAT[1] = 0.34;
                soilPhysical.SAT[2] = 0.34;
                soilPhysical.SAT[3] = 0.34;
                soilPhysical.SAT[4] = 0.34;
                soilPhysical.SAT[5] = 0.34;
                soilPhysical.SAT[6] = 0.34;
                waterBalance.Reset();
            }   
            if ((IrrFactor == true) && (NitFactor == 0))
            {
                if (soilPhysical.Thickness.Length != 7)
                {
                    throw new Exception("Soil layer exception");
                }
             
                soilPhysical.LL15[0] = 0.13;
                soilPhysical.LL15[1] = 0.21;
                soilPhysical.LL15[2] = 0.25;
                soilPhysical.LL15[3] = 0.19;
                soilPhysical.LL15[4] = 0.29;
                soilPhysical.LL15[5] = 0.32;
                soilPhysical.LL15[6] = 0.34;
                soilPhysical.DUL[0] = 0.31;
                soilPhysical.DUL[1] = 0.28;
                soilPhysical.DUL[2] = 0.30;
                soilPhysical.DUL[3] = 0.28;
                soilPhysical.DUL[4] = 0.29;
                soilPhysical.DUL[5] = 0.34;
                soilPhysical.DUL[6] = 0.30;
                soilPhysical.SAT[0] = 0.34;
                soilPhysical.SAT[1] = 0.34;
                soilPhysical.SAT[2] = 0.34;
                soilPhysical.SAT[3] = 0.34;
                soilPhysical.SAT[4] = 0.34;
                soilPhysical.SAT[5] = 0.34;
                soilPhysical.SAT[6] = 0.34;
                waterBalance.Reset();
            }   
            if ((IrrFactor == true) && (NitFactor == 50))
            {
                if (soilPhysical.Thickness.Length != 7)
                {
                    throw new Exception("Soil layer exception");
                }
             
                soilPhysical.LL15[0] = 0.14;
                soilPhysical.LL15[1] = 0.21;
                soilPhysical.LL15[2] = 0.27;
                soilPhysical.LL15[3] = 0.27;
                soilPhysical.LL15[4] = 0.27;
                soilPhysical.LL15[5] = 0.32;
                soilPhysical.LL15[6] = 0.30;
                soilPhysical.DUL[0] = 0.31;
                soilPhysical.DUL[1] = 0.28;
                soilPhysical.DUL[2] = 0.30;
                soilPhysical.DUL[3] = 0.28;
                soilPhysical.DUL[4] = 0.29;
                soilPhysical.DUL[5] = 0.34;
                soilPhysical.DUL[6] = 0.30;
                soilPhysical.SAT[0] = 0.34;
                soilPhysical.SAT[1] = 0.34;
                soilPhysical.SAT[2] = 0.34;
                soilPhysical.SAT[3] = 0.34;
                soilPhysical.SAT[4] = 0.34;
                soilPhysical.SAT[5] = 0.34;
                soilPhysical.SAT[6] = 0.34;
                waterBalance.Reset();
            }
            if ((IrrFactor == true) && (NitFactor == 250))
            {
                if (soilPhysical.Thickness.Length != 7)
                {
                    throw new Exception("Soil layer exception");
                }
             
                soilPhysical.LL15[0] = 0.12;
                soilPhysical.LL15[1] = 0.18;
                soilPhysical.LL15[2] = 0.17;
                soilPhysical.LL15[3] = 0.20;
                soilPhysical.LL15[4] = 0.27;
                soilPhysical.LL15[5] = 0.27;
                soilPhysical.LL15[6] = 0.21;
                soilPhysical.DUL[0] = 0.31;
                soilPhysical.DUL[1] = 0.28;
                soilPhysical.DUL[2] = 0.30;
                soilPhysical.DUL[3] = 0.28;
                soilPhysical.DUL[4] = 0.29;
                soilPhysical.DUL[5] = 0.34;
                soilPhysical.DUL[6] = 0.30;
                soilPhysical.SAT[0] = 0.34;
                soilPhysical.SAT[1] = 0.34;
                soilPhysical.SAT[2] = 0.34;
                soilPhysical.SAT[3] = 0.34;
                soilPhysical.SAT[4] = 0.34;
                soilPhysical.SAT[5] = 0.34;
                soilPhysical.SAT[6] = 0.34;
                waterBalance.Reset();
            }
        }

        [EventSubscribe("StartOfSimulation")]
        private void OnSimulationCommencing(object sender, EventArgs e)
        {
            //    SetSoilLayers();
        }
        
        [EventSubscribe("DoManagement")]
        private void OnDoManagement(object sender, EventArgs e)
        {
            //Specific irrgations
            
            //Fodderbeet
            
            if ((IrrFactor == true) && (NitFactor == 300))
            {
                if ((DateUtilities.CompareDates("1-Feb", Clock.Today) == 0))
                    Irrigation.Apply(40);
                if ((DateUtilities.CompareDates("1-Mar", Clock.Today) == 0))
                    Irrigation.Apply(36);
            }
        
            //Oats
            if (Clock.Today.Year == 2017)
            if ((DateUtilities.CompareDates("5-Jul", Clock.Today) == 0))
            if (IrrFactor == true)
            {
                if (NitFactor == 0)
                    Fert.Apply(40, Models.Fertiliser.Types.NO3N, 10);
                if (NitFactor == 50)
                    Fert.Apply(85, Models.Fertiliser.Types.NO3N, 10);
                if (NitFactor == 300)
                    Fert.Apply(270, Models.Fertiliser.Types.NO3N, 10);
               
            }
             
            
            
        }
    }
        
        
}
```
          Manager SowDateCv
            InitialRootDepth = 5
            CropToSow = Rivage
            SowingDate = 10/18/2016 00:00:00
```csharp
using Models.Surface;
using Models.PMF.Interfaces;
using System.Data;
using APSIM.Shared.Utilities;
using System.Xml.Serialization;
using Models;
using Models.PMF;
using System.Text;
using System.Collections.Generic;
using Models.Core;
using System;

namespace Models
{
    [Serializable] 
    //[System.Xml.Serialization.XmlInclude(typeof(Model))]
    public class Script : Model
    {
        [Link] Plant FodderBeet;
        [Link] Clock Clock;
        [Link] Zone zone;
        [Link] Simulation Simulation;
        [Link] SurfaceOrganicMatter SurfOM;
        
                
        [Description("Initial Root Depth")]
        public double InitialRootDepth { get; set; }
        [Description("Sown Crop")]
        public string CropToSow { get; set; }
        [Description("Sowing Date")]
        public DateTime SowingDate { get; set; }
        //[Description("Sowing Date2")]
        //public DateTime SowingDate2 { get; set; }
        //[Description("Sowing Date3")]
        //public DateTime SowingDate3 { get; set; }
        //[Description("Sowing Date4")]
        //public DateTime SowingDate4 { get; set; }
        
        
        [EventSubscribe("DoManagement")]
        private void OnDoManagement(object sender, EventArgs e)
        {
            if (Clock.Today.Date == SowingDate)
            {
                FodderBeet.Sow(cultivar: CropToSow, population: 9, depth: InitialRootDepth, rowSpacing: 500);
                
            }
            //else if (Clock.Today.Date == SowingDate2)
            {
                //    FodderBeet.Sow(cultivar: CropToSow, population: 9, depth: InitialRootDepth, rowSpacing: 500);
            }
            //else if (Clock.Today.Date == SowingDate3)
            {
                //    FodderBeet.Sow(cultivar: CropToSow, population: 9, depth: InitialRootDepth, rowSpacing: 500);
            }
            //else if (Clock.Today.Date == SowingDate4)
            {
                //    FodderBeet.Sow(cultivar: CropToSow, population: 9, depth: InitialRootDepth, rowSpacing: 500);
        
            }
            
            
        }
    }
}
```
        MicroClimate: a_interception=0; b_interception=1; c_interception=0; d_interception=0; SoilHeatFluxFraction=0.4; MinimumHeightDiffForNewLayer=0; NightInterceptionFraction=0.5; ReferenceHeight=2
        Irrigation
        Fertiliser
        SurfaceOrganicMatter Surface Organic Matter: InitialResidueName=wheat_stubble; InitialResidueType=grass; InitialResidueMass=2500; InitialStandingFraction=0; InitialCPR=0; InitialCNR=40
        Soil: SoilType=NZ_sedementary; Region=Plains; State=Canterbury; Country=New Zealnd; Latitude=0; Longitude=0
          Chemical
            Thickness  NO3N      NH4N     PH
            100        8.33333   14.8148  6.6
            200        4.72846   10.5909  6.2
            300        1.6091    3.60383  5.7
            300        0.769231  1.92308  5.5
            300        0.769231  1.92308  5.5
            300        1.15385   1.92308  5.5
          Physical
            Thickness  BD     AirDry  LL15  DUL   SAT    KS
            150        1      0.05    0.08  0.32  0.35   4832.039
            150        1.32   0.05    0.08  0.32  0.35   389.229
            300        1.35   0.05    0.08  0.32  0.342  16.362
            300        1.3    0.05    0.08  0.28  0.322  97.995
            300        1.3    0.05    0.08  0.28  0.348  97.995
            300        1.3    0.05    0.08  0.28  0.342  97.995
            300        1.3    0.05    0.08  0.28  0.307  97.995
            200        1.601  0.06    0.08  0.22  0.309  97.995
            SoilCrop OatsSoil: LL=[0.1, 0.1, 0.149, 0.129, 0.155, 0.149, 0.053, 0.061]; KL=[0.06, 0.06, 0.05, 0.08, 0.03, 0.01, 0, 0]; XF=[1, 1, 1, 1, 1, 1, 1, 1]
            SoilCrop FodderBeetSoil: LL=[0.12, 0.12, 0.12, 0.12, 0.12, 0.12, 0.12, 0.12]; KL=[0.1, 0.06, 0.06, 0.06, 0.06, 0.06, 0.06, 0.06]; XF=[1, 1, 1, 1, 1, 1, 1, 1]
          WaterBalance SoilWater: SummerDate=1-Nov; SummerU=6; SummerCona=2; WinterDate=1-Apr; WinterU=9; WinterCona=4.4; DiffusConst=0; DiffusSlope=0; Salb=0.18; CN2Bare=68; CNRed=20; CNCov=0.8; DischargeWidth=0; CatchmentArea=0
            Thickness  SWCON  KLAT
            200        0.7    0
            200        0.7    0
            200        0.95   0
            200        0.95   0
            200        0.95   0
            200        0.95   0
            200        0.95   0
            200        0.95   0
          SoilNitrogen: fom_types=[default, manure, mucuna, lablab, shemp, stable]; fract_carb=[0.2, 0.3, 0.54, 0.57, 0.45, 0]; fract_cell=[0.7, 0.3, 0.37, 0.37, 0.47, 0.1]; fract_lign=[0.1, 0.4, 0.09, 0.06, 0.08, 0.9]; NPartitionApproach=0
            SoilNitrogenNO3 NO3
            SoilNitrogenNH4 NH4
            SoilNitrogenUrea Urea
          Organic: FOMCNRatio=20
            Thickness  Carbon  SoilCNRatio  FBiom  FInert  FOM
            180        3       11           0.06   0.337   1427.528
            150        1.247   11           0.04   0.657   316.72
            400        0.316   11           0.012  0.85    142.312
            270        0.208   11           0.01   0.945   82.9318
            500        0.2     11           0.01   0.983   30.5089
          Sample Initial Soil Settings: Thickness=[200, 200, 200, 200, 200, 200, 200, 200]; SW=[0.3, 0.28, 0.24, 0.24, 0.28, 0.28, 0.28, 0.22]; SWUnits=Volumetric; OCUnits=Total; PHUnits=Water
          CERESSoilTemperature Temperature
        Report: EventNames=[Clock].DoReport
          VariableNames:
            [Clock].Today
            [FodderBeet].StorageRoot.Live.Nitrogen.Structural
            [FodderBeet].StorageRoot.Live.Nitrogen.Metabolic
            [FodderBeet].StorageRoot.Live.Nitrogen.Storage
            [FodderBeet].StorageRoot.Live.Carbon.Structural
            [FodderBeet].StorageRoot.Live.Carbon.Metabolic
            [FodderBeet].StorageRoot.Live.Carbon.Storage
            [FodderBeet].StorageRoot.Dead.Nitrogen.Structural
            [FodderBeet].StorageRoot.Dead.Nitrogen.Metabolic
            [FodderBeet].StorageRoot.Dead.Nitrogen.Storage
            [FodderBeet].StorageRoot.Dead.Carbon.Structural
            [FodderBeet].StorageRoot.Dead.Carbon.Metabolic
            [FodderBeet].StorageRoot.Dead.Carbon.Storage
            [FodderBeet].StorageRoot.Carbon.Supplies.ReAllocation.Structural
            [FodderBeet].StorageRoot.Carbon.Supplies.ReAllocation.Metabolic
            [FodderBeet].StorageRoot.Carbon.Supplies.ReAllocation.Storage
            [FodderBeet].StorageRoot.Carbon.Supplies.Fixation
            [FodderBeet].StorageRoot.Carbon.Supplies.Uptake
            [FodderBeet].StorageRoot.Carbon.Supplies.ReTranslocation.Structural
            [FodderBeet].StorageRoot.Carbon.Supplies.ReTranslocation.Metabolic
            [FodderBeet].StorageRoot.Carbon.Supplies.ReTranslocation.Storage
            [FodderBeet].StorageRoot.Carbon.SuppliesAllocated.ReAllocation.Structural
            [FodderBeet].StorageRoot.Carbon.SuppliesAllocated.ReAllocation.Metabolic
            [FodderBeet].StorageRoot.Carbon.SuppliesAllocated.ReAllocation.Storage
            [FodderBeet].StorageRoot.Carbon.SuppliesAllocated.Fixation
            [FodderBeet].StorageRoot.Carbon.SuppliesAllocated.Uptake
            [FodderBeet].StorageRoot.Carbon.SuppliesAllocated.ReTranslocation.Structural
            [FodderBeet].StorageRoot.Carbon.SuppliesAllocated.ReTranslocation.Metabolic
            [FodderBeet].StorageRoot.Carbon.SuppliesAllocated.ReTranslocation.Storage
            [FodderBeet].StorageRoot.Carbon.Demands.Structural
            [FodderBeet].StorageRoot.Carbon.Demands.Metabolic
            [FodderBeet].StorageRoot.Carbon.Demands.Storage
            [FodderBeet].StorageRoot.Carbon.DemandsAllocated.Structural
            [FodderBeet].StorageRoot.Carbon.DemandsAllocated.Metabolic
            [FodderBeet].StorageRoot.Carbon.DemandsAllocated.Storage
            [FodderBeet].StorageRoot.Nitrogen.Supplies.ReAllocation.Structural
            [FodderBeet].StorageRoot.Nitrogen.Supplies.ReAllocation.Metabolic
            [FodderBeet].StorageRoot.Nitrogen.Supplies.ReAllocation.Storage
            [FodderBeet].StorageRoot.Nitrogen.Supplies.Fixation
            [FodderBeet].StorageRoot.Nitrogen.Supplies.Uptake
            [FodderBeet].StorageRoot.Nitrogen.Supplies.ReTranslocation.Structural
            [FodderBeet].StorageRoot.Nitrogen.Supplies.ReTranslocation.Metabolic
            [FodderBeet].StorageRoot.Nitrogen.Supplies.ReTranslocation.Storage
            [FodderBeet].StorageRoot.Nitrogen.SuppliesAllocated.ReAllocation.Structural
            [FodderBeet].StorageRoot.Nitrogen.SuppliesAllocated.ReAllocation.Metabolic
            [FodderBeet].StorageRoot.Nitrogen.SuppliesAllocated.ReAllocation.Storage
            [FodderBeet].StorageRoot.Nitrogen.SuppliesAllocated.Fixation
            [FodderBeet].StorageRoot.Nitrogen.SuppliesAllocated.Uptake
            [FodderBeet].StorageRoot.Nitrogen.SuppliesAllocated.ReTranslocation.Structural
            [FodderBeet].StorageRoot.Nitrogen.SuppliesAllocated.ReTranslocation.Metabolic
            [FodderBeet].StorageRoot.Nitrogen.SuppliesAllocated.ReTranslocation.Storage
            [FodderBeet].StorageRoot.Nitrogen.Demands.Structural
            [FodderBeet].StorageRoot.Nitrogen.Demands.Metabolic
            [FodderBeet].StorageRoot.Nitrogen.Demands.Storage
            [FodderBeet].StorageRoot.Nitrogen.DemandsAllocated.Structural
            [FodderBeet].StorageRoot.Nitrogen.DemandsAllocated.Metabolic
            [FodderBeet].StorageRoot.Nitrogen.DemandsAllocated.Storage
        Report AllArbitrator: EventNames=[Clock].DoReport
          VariableNames:
            [Clock].Today
            [FodderBeet].Arbitrator.Carbon.TotalPlantSupply
            [FodderBeet].Arbitrator.Carbon.TotalPlantDemand
            [FodderBeet].Arbitrator.Carbon.TotalPlantDemandsAllocated
            [FodderBeet].Arbitrator.Nitrogen.TotalPlantSupply
            [FodderBeet].Arbitrator.Nitrogen.TotalPlantDemand
            [FodderBeet].Arbitrator.Nitrogen.TotalPlantDemandsAllocated
            [FodderBeet].StorageRoot.Live.Nitrogen.Structural
            [FodderBeet].StorageRoot.Live.Nitrogen.Metabolic
            [FodderBeet].StorageRoot.Live.Nitrogen.Storage
            [FodderBeet].StorageRoot.Live.Carbon.Structural
            [FodderBeet].StorageRoot.Live.Carbon.Metabolic
            [FodderBeet].StorageRoot.Live.Carbon.Storage
            [FodderBeet].StorageRoot.Dead.Nitrogen.Structural
            [FodderBeet].StorageRoot.Dead.Nitrogen.Metabolic
            [FodderBeet].StorageRoot.Dead.Nitrogen.Storage
            [FodderBeet].StorageRoot.Dead.Carbon.Structural
            [FodderBeet].StorageRoot.Dead.Carbon.Metabolic
            [FodderBeet].StorageRoot.Dead.Carbon.Storage
            [FodderBeet].StorageRoot.Carbon.Supplies.ReAllocation.Structural
            [FodderBeet].StorageRoot.Carbon.Supplies.ReAllocation.Metabolic
            [FodderBeet].StorageRoot.Carbon.Supplies.ReAllocation.Storage
            [FodderBeet].StorageRoot.Carbon.Supplies.Fixation
            [FodderBeet].StorageRoot.Carbon.Supplies.Uptake
            [FodderBeet].StorageRoot.Carbon.Supplies.ReTranslocation.Structural
            [FodderBeet].StorageRoot.Carbon.Supplies.ReTranslocation.Metabolic
            [FodderBeet].StorageRoot.Carbon.Supplies.ReTranslocation.Storage
            [FodderBeet].StorageRoot.Carbon.SuppliesAllocated.ReAllocation.Structural
            [FodderBeet].StorageRoot.Carbon.SuppliesAllocated.ReAllocation.Metabolic
            [FodderBeet].StorageRoot.Carbon.SuppliesAllocated.ReAllocation.Storage
            [FodderBeet].StorageRoot.Carbon.SuppliesAllocated.Fixation
            [FodderBeet].StorageRoot.Carbon.SuppliesAllocated.Uptake
            [FodderBeet].StorageRoot.Carbon.SuppliesAllocated.ReTranslocation.Structural
            [FodderBeet].StorageRoot.Carbon.SuppliesAllocated.ReTranslocation.Metabolic
            [FodderBeet].StorageRoot.Carbon.SuppliesAllocated.ReTranslocation.Storage
            [FodderBeet].StorageRoot.Carbon.Demands.Structural
            [FodderBeet].StorageRoot.Carbon.Demands.Metabolic
            [FodderBeet].StorageRoot.Carbon.Demands.Storage
            [FodderBeet].StorageRoot.Carbon.DemandsAllocated.Structural
            [FodderBeet].StorageRoot.Carbon.DemandsAllocated.Metabolic
            [FodderBeet].StorageRoot.Carbon.DemandsAllocated.Storage
            [FodderBeet].StorageRoot.Nitrogen.Supplies.ReAllocation.Structural
            [FodderBeet].StorageRoot.Nitrogen.Supplies.ReAllocation.Metabolic
            [FodderBeet].StorageRoot.Nitrogen.Supplies.ReAllocation.Storage
            [FodderBeet].StorageRoot.Nitrogen.Supplies.Fixation
            [FodderBeet].StorageRoot.Nitrogen.Supplies.Uptake
            [FodderBeet].StorageRoot.Nitrogen.Supplies.ReTranslocation.Structural
            [FodderBeet].StorageRoot.Nitrogen.Supplies.ReTranslocation.Metabolic
            [FodderBeet].StorageRoot.Nitrogen.Supplies.ReTranslocation.Storage
            [FodderBeet].StorageRoot.Nitrogen.SuppliesAllocated.ReAllocation.Structural
            [FodderBeet].StorageRoot.Nitrogen.SuppliesAllocated.ReAllocation.Metabolic
            [FodderBeet].StorageRoot.Nitrogen.SuppliesAllocated.ReAllocation.Storage
            [FodderBeet].StorageRoot.Nitrogen.SuppliesAllocated.Fixation
            [FodderBeet].StorageRoot.Nitrogen.SuppliesAllocated.Uptake
            [FodderBeet].StorageRoot.Nitrogen.SuppliesAllocated.ReTranslocation.Structural
            [FodderBeet].StorageRoot.Nitrogen.SuppliesAllocated.ReTranslocation.Metabolic
            [FodderBeet].StorageRoot.Nitrogen.SuppliesAllocated.ReTranslocation.Storage
            [FodderBeet].StorageRoot.Nitrogen.Demands.Structural
            [FodderBeet].StorageRoot.Nitrogen.Demands.Metabolic
            [FodderBeet].StorageRoot.Nitrogen.Demands.Storage
            [FodderBeet].StorageRoot.Nitrogen.DemandsAllocated.Structural
            [FodderBeet].StorageRoot.Nitrogen.DemandsAllocated.Metabolic
            [FodderBeet].StorageRoot.Nitrogen.DemandsAllocated.Storage
            [FodderBeet].Leaf.Live.Nitrogen.Structural
            [FodderBeet].Leaf.Live.Nitrogen.Metabolic
            [FodderBeet].Leaf.Live.Nitrogen.Storage
            [FodderBeet].Leaf.Live.Carbon.Structural
            [FodderBeet].Leaf.Live.Carbon.Metabolic
            [FodderBeet].Leaf.Live.Carbon.Storage
            [FodderBeet].Leaf.Dead.Nitrogen.Structural
            [FodderBeet].Leaf.Dead.Nitrogen.Metabolic
            [FodderBeet].Leaf.Dead.Nitrogen.Storage
            [FodderBeet].Leaf.Dead.Carbon.Structural
            [FodderBeet].Leaf.Dead.Carbon.Metabolic
            [FodderBeet].Leaf.Dead.Carbon.Storage
            [FodderBeet].Leaf.Carbon.Supplies.ReAllocation.Structural
            [FodderBeet].Leaf.Carbon.Supplies.ReAllocation.Metabolic
            [FodderBeet].Leaf.Carbon.Supplies.ReAllocation.Storage
            [FodderBeet].Leaf.Carbon.Supplies.Fixation
            [FodderBeet].Leaf.Carbon.Supplies.Uptake
            [FodderBeet].Leaf.Carbon.Supplies.ReTranslocation.Structural
            [FodderBeet].Leaf.Carbon.Supplies.ReTranslocation.Metabolic
            [FodderBeet].Leaf.Carbon.Supplies.ReTranslocation.Storage
            [FodderBeet].Leaf.Carbon.SuppliesAllocated.ReAllocation.Structural
            [FodderBeet].Leaf.Carbon.SuppliesAllocated.ReAllocation.Metabolic
            [FodderBeet].Leaf.Carbon.SuppliesAllocated.ReAllocation.Storage
            [FodderBeet].Leaf.Carbon.SuppliesAllocated.Fixation
            [FodderBeet].Leaf.Carbon.SuppliesAllocated.Uptake
            [FodderBeet].Leaf.Carbon.SuppliesAllocated.ReTranslocation.Structural
            [FodderBeet].Leaf.Carbon.SuppliesAllocated.ReTranslocation.Metabolic
            [FodderBeet].Leaf.Carbon.SuppliesAllocated.ReTranslocation.Storage
            [FodderBeet].Leaf.Carbon.Demands.Structural
            [FodderBeet].Leaf.Carbon.Demands.Metabolic
            [FodderBeet].Leaf.Carbon.Demands.Storage
            [FodderBeet].Leaf.Carbon.DemandsAllocated.Structural
            [FodderBeet].Leaf.Carbon.DemandsAllocated.Metabolic
            [FodderBeet].Leaf.Carbon.DemandsAllocated.Storage
            [FodderBeet].Leaf.Nitrogen.Supplies.ReAllocation.Structural
            [FodderBeet].Leaf.Nitrogen.Supplies.ReAllocation.Metabolic
            [FodderBeet].Leaf.Nitrogen.Supplies.ReAllocation.Storage
            [FodderBeet].Leaf.Nitrogen.Supplies.Fixation
            [FodderBeet].Leaf.Nitrogen.Supplies.Uptake
            [FodderBeet].Leaf.Nitrogen.Supplies.ReTranslocation.Structural
            [FodderBeet].Leaf.Nitrogen.Supplies.ReTranslocation.Metabolic
            [FodderBeet].Leaf.Nitrogen.Supplies.ReTranslocation.Storage
            [FodderBeet].Leaf.Nitrogen.SuppliesAllocated.ReAllocation.Structural
            [FodderBeet].Leaf.Nitrogen.SuppliesAllocated.ReAllocation.Metabolic
            [FodderBeet].Leaf.Nitrogen.SuppliesAllocated.ReAllocation.Storage
            [FodderBeet].Leaf.Nitrogen.SuppliesAllocated.Fixation
            [FodderBeet].Leaf.Nitrogen.SuppliesAllocated.Uptake
            [FodderBeet].Leaf.Nitrogen.SuppliesAllocated.ReTranslocation.Structural
            [FodderBeet].Leaf.Nitrogen.SuppliesAllocated.ReTranslocation.Metabolic
            [FodderBeet].Leaf.Nitrogen.SuppliesAllocated.ReTranslocation.Storage
            [FodderBeet].Leaf.Nitrogen.Demands.Structural
            [FodderBeet].Leaf.Nitrogen.Demands.Metabolic
            [FodderBeet].Leaf.Nitrogen.Demands.Storage
            [FodderBeet].Leaf.Nitrogen.DemandsAllocated.Structural
            [FodderBeet].Leaf.Nitrogen.DemandsAllocated.Metabolic
            [FodderBeet].Leaf.Nitrogen.DemandsAllocated.Storage
            [FodderBeet].Petiole.Live.Nitrogen.Structural
            [FodderBeet].Petiole.Live.Nitrogen.Metabolic
            [FodderBeet].Petiole.Live.Nitrogen.Storage
            [FodderBeet].Petiole.Live.Carbon.Structural
            [FodderBeet].Petiole.Live.Carbon.Metabolic
            [FodderBeet].Petiole.Live.Carbon.Storage
            [FodderBeet].Petiole.Dead.Nitrogen.Structural
            [FodderBeet].Petiole.Dead.Nitrogen.Metabolic
            [FodderBeet].Petiole.Dead.Nitrogen.Storage
            [FodderBeet].Petiole.Dead.Carbon.Structural
            [FodderBeet].Petiole.Dead.Carbon.Metabolic
            [FodderBeet].Petiole.Dead.Carbon.Storage
            [FodderBeet].Petiole.Carbon.Supplies.ReAllocation.Structural
            [FodderBeet].Petiole.Carbon.Supplies.ReAllocation.Metabolic
            [FodderBeet].Petiole.Carbon.Supplies.ReAllocation.Storage
            [FodderBeet].Petiole.Carbon.Supplies.Fixation
            [FodderBeet].Petiole.Carbon.Supplies.Uptake
            [FodderBeet].Petiole.Carbon.Supplies.ReTranslocation.Structural
            [FodderBeet].Petiole.Carbon.Supplies.ReTranslocation.Metabolic
            [FodderBeet].Petiole.Carbon.Supplies.ReTranslocation.Storage
            [FodderBeet].Petiole.Carbon.SuppliesAllocated.ReAllocation.Structural
            [FodderBeet].Petiole.Carbon.SuppliesAllocated.ReAllocation.Metabolic
            [FodderBeet].Petiole.Carbon.SuppliesAllocated.ReAllocation.Storage
            [FodderBeet].Petiole.Carbon.SuppliesAllocated.Fixation
            [FodderBeet].Petiole.Carbon.SuppliesAllocated.Uptake
            [FodderBeet].Petiole.Carbon.SuppliesAllocated.ReTranslocation.Structural
            [FodderBeet].Petiole.Carbon.SuppliesAllocated.ReTranslocation.Metabolic
            [FodderBeet].Petiole.Carbon.SuppliesAllocated.ReTranslocation.Storage
            [FodderBeet].Petiole.Carbon.Demands.Structural
            [FodderBeet].Petiole.Carbon.Demands.Metabolic
            [FodderBeet].Petiole.Carbon.Demands.Storage
            [FodderBeet].Petiole.Carbon.DemandsAllocated.Structural
            [FodderBeet].Petiole.Carbon.DemandsAllocated.Metabolic
            [FodderBeet].Petiole.Carbon.DemandsAllocated.Storage
            [FodderBeet].Petiole.Nitrogen.Supplies.ReAllocation.Structural
            [FodderBeet].Petiole.Nitrogen.Supplies.ReAllocation.Metabolic
            [FodderBeet].Petiole.Nitrogen.Supplies.ReAllocation.Storage
            [FodderBeet].Petiole.Nitrogen.Supplies.Fixation
            [FodderBeet].Petiole.Nitrogen.Supplies.Uptake
            [FodderBeet].Petiole.Nitrogen.Supplies.ReTranslocation.Structural
            [FodderBeet].Petiole.Nitrogen.Supplies.ReTranslocation.Metabolic
            [FodderBeet].Petiole.Nitrogen.Supplies.ReTranslocation.Storage
            [FodderBeet].Petiole.Nitrogen.SuppliesAllocated.ReAllocation.Structural
            [FodderBeet].Petiole.Nitrogen.SuppliesAllocated.ReAllocation.Metabolic
            [FodderBeet].Petiole.Nitrogen.SuppliesAllocated.ReAllocation.Storage
            [FodderBeet].Petiole.Nitrogen.SuppliesAllocated.Fixation
            [FodderBeet].Petiole.Nitrogen.SuppliesAllocated.Uptake
            [FodderBeet].Petiole.Nitrogen.SuppliesAllocated.ReTranslocation.Structural
            [FodderBeet].Petiole.Nitrogen.SuppliesAllocated.ReTranslocation.Metabolic
            [FodderBeet].Petiole.Nitrogen.SuppliesAllocated.ReTranslocation.Storage
            [FodderBeet].Petiole.Nitrogen.Demands.Structural
            [FodderBeet].Petiole.Nitrogen.Demands.Metabolic
            [FodderBeet].Petiole.Nitrogen.Demands.Storage
            [FodderBeet].Petiole.Nitrogen.DemandsAllocated.Structural
            [FodderBeet].Petiole.Nitrogen.DemandsAllocated.Metabolic
            [FodderBeet].Petiole.Nitrogen.DemandsAllocated.Storage
            [FodderBeet].Root.Live.Nitrogen.Structural
            [FodderBeet].Root.Live.Nitrogen.Metabolic
            [FodderBeet].Root.Live.Nitrogen.Storage
            [FodderBeet].Root.Live.Carbon.Structural
            [FodderBeet].Root.Live.Carbon.Metabolic
            [FodderBeet].Root.Live.Carbon.Storage
            [FodderBeet].Root.Dead.Nitrogen.Structural
            [FodderBeet].Root.Dead.Nitrogen.Metabolic
            [FodderBeet].Root.Dead.Nitrogen.Storage
            [FodderBeet].Root.Dead.Carbon.Structural
            [FodderBeet].Root.Dead.Carbon.Metabolic
            [FodderBeet].Root.Dead.Carbon.Storage
            [FodderBeet].Root.Carbon.Supplies.ReAllocation.Structural
            [FodderBeet].Root.Carbon.Supplies.ReAllocation.Metabolic
            [FodderBeet].Root.Carbon.Supplies.ReAllocation.Storage
            [FodderBeet].Root.Carbon.Supplies.Fixation
            [FodderBeet].Root.Carbon.Supplies.Uptake
            [FodderBeet].Root.Carbon.Supplies.ReTranslocation.Structural
            [FodderBeet].Root.Carbon.Supplies.ReTranslocation.Metabolic
            [FodderBeet].Root.Carbon.Supplies.ReTranslocation.Storage
            [FodderBeet].Root.Carbon.SuppliesAllocated.ReAllocation.Structural
            [FodderBeet].Root.Carbon.SuppliesAllocated.ReAllocation.Metabolic
            [FodderBeet].Root.Carbon.SuppliesAllocated.ReAllocation.Storage
            [FodderBeet].Root.Carbon.SuppliesAllocated.Fixation
            [FodderBeet].Root.Carbon.SuppliesAllocated.Uptake
            [FodderBeet].Root.Carbon.SuppliesAllocated.ReTranslocation.Structural
            [FodderBeet].Root.Carbon.SuppliesAllocated.ReTranslocation.Metabolic
            [FodderBeet].Root.Carbon.SuppliesAllocated.ReTranslocation.Storage
            [FodderBeet].Root.Carbon.Demands.Structural
            [FodderBeet].Root.Carbon.Demands.Metabolic
            [FodderBeet].Root.Carbon.Demands.Storage
            [FodderBeet].Root.Carbon.DemandsAllocated.Structural
            [FodderBeet].Root.Carbon.DemandsAllocated.Metabolic
            [FodderBeet].Root.Carbon.DemandsAllocated.Storage
            [FodderBeet].Root.Nitrogen.Supplies.ReAllocation.Structural
            [FodderBeet].Root.Nitrogen.Supplies.ReAllocation.Metabolic
            [FodderBeet].Root.Nitrogen.Supplies.ReAllocation.Storage
            [FodderBeet].Root.Nitrogen.Supplies.Fixation
            [FodderBeet].Root.Nitrogen.Supplies.Uptake
            [FodderBeet].Root.Nitrogen.Supplies.ReTranslocation.Structural
            [FodderBeet].Root.Nitrogen.Supplies.ReTranslocation.Metabolic
            [FodderBeet].Root.Nitrogen.Supplies.ReTranslocation.Storage
            [FodderBeet].Root.Nitrogen.SuppliesAllocated.ReAllocation.Structural
            [FodderBeet].Root.Nitrogen.SuppliesAllocated.ReAllocation.Metabolic
            [FodderBeet].Root.Nitrogen.SuppliesAllocated.ReAllocation.Storage
            [FodderBeet].Root.Nitrogen.SuppliesAllocated.Fixation
            [FodderBeet].Root.Nitrogen.SuppliesAllocated.Uptake
            [FodderBeet].Root.Nitrogen.SuppliesAllocated.ReTranslocation.Structural
            [FodderBeet].Root.Nitrogen.SuppliesAllocated.ReTranslocation.Metabolic
            [FodderBeet].Root.Nitrogen.SuppliesAllocated.ReTranslocation.Storage
            [FodderBeet].Root.Nitrogen.Demands.Structural
            [FodderBeet].Root.Nitrogen.Demands.Metabolic
            [FodderBeet].Root.Nitrogen.Demands.Storage
            [FodderBeet].Root.Nitrogen.DemandsAllocated.Structural
            [FodderBeet].Root.Nitrogen.DemandsAllocated.Metabolic
            [FodderBeet].Root.Nitrogen.DemandsAllocated.Storage
            [FodderBeet].StorageRoot.SenescenceRate
            [FodderBeet].Leaf.SenescenceRate
            [FodderBeet].Petiole.SenescenceRate
            [FodderBeet].Root.SenescenceRate
  DataStore
    ExcelInput ObservedData: FileNames=[0bserved.xlsx]; SheetNames=[ObservedData]
    PredictedObserved: PredictedTableName=Report; ObservedTableName=ObservedData; FieldNameUsedForMatch=Clock.Today; AllColumns=false
      Tests: POName=PredictedObserved
        AcceptedStats:
          {Name=FodderBeet.AboveGround.N, n=318, Slope=0.938006, Intercept=2.03246, SEslope=0.0354646, SEintercept=0.883552, R2=0.68884, RMSE=6.9747, NSE=0.595244, ME=0.645537, MAE=5.16363, RSR=0.635203}
          {Name=FodderBeet.AboveGround.Wt, n=419, Slope=0.923824, Intercept=174.982, SEslope=0.0219921, SEintercept=37.8735, R2=0.808856, RMSE=377.886, NSE=0.787223, ME=59.5892, MAE=292.114, RSR=0.460726}
          {Name=FodderBeet.Leaf.CoverGreen, n=236, Slope=0.80735, Intercept=0.129945, SEslope=0.0268541, SEintercept=0.0211523, R2=0.794352, RMSE=0.0991336, NSE=0.78863, ME=-0.016004, MAE=0.0772493, RSR=0.458775}
          {Name=FodderBeet.Leaf.CoverTotal, n=120, Slope=0.617119, Intercept=0.343463, SEslope=0.0416276, SEintercept=0.0292236, R2=0.650653, RMSE=0.149123, NSE=0.471511, ME=0.0864014, MAE=0.106643, RSR=0.723937}
          {Name=FodderBeet.Leaf.LAI, n=387, Slope=0.566521, Intercept=1.04607, SEslope=0.0320736, SEintercept=0.0872368, R2=0.447623, RMSE=0.917751, NSE=0.415944, ME=-0.0118086, MAE=0.672606, RSR=0.763248}
          {Name=FodderBeet.Leaf.Live.N, n=304, Slope=0.656384, Intercept=2.18115, SEslope=0.0364784, SEintercept=0.233661, R2=0.517398, RMSE=2.02371, NSE=0.474917, ME=0.200345, MAE=1.52771, RSR=0.723433}
          {Name=FodderBeet.Leaf.Live.Wt, n=389, Slope=0.764059, Intercept=71.7031, SEslope=0.0417322, SEintercept=6.90444, R2=0.464141, RMSE=68.7892, NSE=-0.00848723, ME=36.1704, MAE=52.8249, RSR=1.00294}
          {Name=FodderBeet.Leaf.PlantAppearedGreenLeafNo, n=207, Slope=1.09434, Intercept=1.50281, SEslope=0.0373819, SEintercept=0.826107, R2=0.806969, RMSE=4.8185, NSE=0.371827, ME=3.50725, MAE=3.70435, RSR=0.790657}
          {Name=FodderBeet.Petiole.Live.N, n=304, Slope=0.420079, Intercept=1.54401, SEslope=0.0361783, SEintercept=0.103415, R2=0.308646, RMSE=1.24998, NSE=0.261934, ME=0.117128, MAE=0.97193, RSR=0.857694}
          {Name=FodderBeet.Petiole.Live.Wt, n=389, Slope=0.575146, Intercept=69.3703, SEslope=0.0300095, SEintercept=4.53989, R2=0.486953, RMSE=56.596, NSE=0.438176, ME=13.6756, MAE=44.3575, RSR=0.748585}
          {Name=FodderBeet.Phenology.Stage, n=16, Slope=1.1979, Intercept=-0.360065, SEslope=0.0215605, SEintercept=0.0955135, R2=0.995485, RMSE=0.550194, NSE=0.806264, ME=0.480991, MAE=0.480991, RSR=0.426178}
          {Name=FodderBeet.SCS, n=2, Slope=1.06257, Intercept=-325.122, SEslope=0, SEintercept=0, R2=1, RMSE=258.901, NSE=-6.198, ME=-258.83, MAE=258.83, RSR=1.8971}
          {Name=FodderBeet.StorageRoot.Live.N, n=304, Slope=0.968959, Intercept=-1.00743, SEslope=0.0351606, SEintercept=0.543942, R2=0.715483, RMSE=5.22354, NSE=0.596075, ME=-1.41426, MAE=3.9769, RSR=0.634505}
          {Name=FodderBeet.StorageRoot.Live.Wt, n=389, Slope=0.874342, Intercept=106.108, SEslope=0.0211491, SEintercept=28.7261, R2=0.815375, RMSE=312.911, NSE=0.808121, ME=-39.0587, MAE=235.213, RSR=0.437477}
          {Name=FodderBeet.Structure.LeafTipsAppeared, n=207, Slope=0.978821, Intercept=0.702624, SEslope=0.0100946, SEintercept=0.404815, R2=0.978662, RMSE=2.49368, NSE=0.978647, ME=-0.0659708, MAE=1.96682, RSR=0.145775}
          {Name=FodderBeet.TotalDead.N, n=98, Slope=2.48882, Intercept=0.19878, SEslope=0.172148, SEintercept=0.26952, R2=0.685264, RMSE=2.97312, NSE=-8.54089, ME=2.03717, MAE=2.13922, RSR=3.07303}
          {Name=Nit, n=1112, Slope=1, Intercept=0, SEslope=0, SEintercept=0, R2=1, RMSE=0, NSE=1, ME=0, MAE=0, RSR=0}
        AcceptedStatsName=Name n Slope Intercept SEslope SEintercept R2 RMSE NSE ME MAE RSR
  Folder LincolnCalibrationData
    Experiment LincolnRS2016
      DisabledSimNames=[LincolnRS2016IrrNilNit300, LincolnRS2016IrrNilNit50, LincolnRS2016IrrFullNit50, LincolnRS2016IrrNilNit0]
      Memo Trial details
        This trial was conducted in the rainshelter at Plant and Food Research in Lincoln, New Zealand in 2016. The objective was to evaluate the effect of nitrogen and irrigation on the development and growth of fodder beet crops.
        Details:

        •	Three nitrogen treatments:  0 kg N/ha, 50 kg N/ha & 300 kg N/ha applied as dissolved urea with fertigation
        •	Two irrigation treatments: Nil and full irrigation

        Fodder beet (cultivar "Rivage") was precision drilled on 18 October 2016. Sowing density was 11 plants/m2 and row spacing was 0.45m.
      Factors: same as LincolnRS20161.Factors
      Simulation Rainshelter
        Clock: Start=2016-10-09; End=2017-05-18
        Summary summaryfile
        Weather
          FileName=C:\GitHubRepos\ApsimX\Tests\Validation\FodderBeet\lincoln.met
        SoilArbitrator Soil Arbitrator
        Zone paddock: Area=1; Slope=0; AspectAngle=0; Altitude=50
          Plant FodderBeet
          Folder Manager folder: same as LincolnRS20161.Rainsheltertest.paddock.Manager folder
          MicroClimate: a_interception=0; b_interception=1; c_interception=0; d_interception=0; SoilHeatFluxFraction=0.4; MinimumHeightDiffForNewLayer=0; NightInterceptionFraction=0.5; ReferenceHeight=2
          Irrigation
          Fertiliser
          SurfaceOrganicMatter Surface Organic Matter: InitialResidueName=wheat_stubble; InitialResidueType=grass; InitialResidueMass=2500; InitialStandingFraction=0; InitialCPR=0; InitialCNR=40
          Soil: same as LincolnRS20161.Rainsheltertest.paddock.Soil
          Report: EventNames=[Clock].DoReport
            VariableNames:
              [Clock].Today
              [Weather].MeanT
              [Soil].SoilWater.SW
              [Soil].SoilWater.SWmm
              sum([Soil].SoilWater.SWmm) as ProfileWater
              [FodderBeet].AboveGround.N
              [FodderBeet].AboveGround.Wt
              [FodderBeet].AboveGroundLive.N
              [FodderBeet].AboveGroundLive.Wt
              [FodderBeet].AboveGroundDead.N
              [FodderBeet].AboveGroundDead.Wt
              [FodderBeet].Arbitrator.DMDemand
              [FodderBeet].Arbitrator.DM.TotalFixationSupply
              [FodderBeet].Leaf.AppearedCohortNo
              [FodderBeet].Leaf.CoverDead
              [FodderBeet].Leaf.CoverGreen
              [FodderBeet].Leaf.CoverTotal
              [FodderBeet].Leaf.Dead.N
              [FodderBeet].Leaf.Dead.NConc
              [FodderBeet].Leaf.Dead.Wt
              [FodderBeet].Leaf.DeadCohortNo
              [FodderBeet].Leaf.SenescingCohortNo
              [FodderBeet].Leaf.ExpandedCohortNo
              [FodderBeet].Leaf.Fn
              [FodderBeet].Leaf.Fw
              [FodderBeet].Leaf.Height
              [FodderBeet].Leaf.InitialisedCohortNo
              [FodderBeet].Leaf.LAI
              [FodderBeet].Leaf.Live.N
              [FodderBeet].Leaf.Live.NConc
              [FodderBeet].Leaf.Live.Wt
              [FodderBeet].Leaf.SpecificArea
              [FodderBeet].Leaf.Transpiration
              [FodderBeet].Phenology.CurrentPhase.Name
              [FodderBeet].Phenology.CurrentStageName
              [FodderBeet].Phenology.DailyVernalisation
              [FodderBeet].Phenology.Photoperiod
              [FodderBeet].Phenology.Stage
              [FodderBeet].Phenology.ThermalTime
              [FodderBeet].Phenology.ThermalTime
              [FodderBeet].Phenology.Vrn1
              [FodderBeet].Phenology.Vrn2
              [FodderBeet].Phenology.Vrn4
              [FodderBeet].Phenology.Zadok.Stage
              [FodderBeet].Root.Depth
              [FodderBeet].Root.N
              [FodderBeet].Root.Wt
              [FodderBeet].Root.Nconc
              [FodderBeet].Root.WaterUptake
              [FodderBeet].StorageRoot.N
              [FodderBeet].StorageRoot.NConc
              [FodderBeet].StorageRoot.Wt
              [FodderBeet].StorageRoot.Live.StorageWt
              [FodderBeet].Petiole.N
              [FodderBeet].Petiole.NConc
              [FodderBeet].Petiole.Wt
              [FodderBeet].Petiole.PercentWSC
              [FodderBeet].Petiole.Live.StorageWt
              [FodderBeet].SowingData.Cultivar
              [FodderBeet].Structure.Height
              [FodderBeet].Structure.LeafTipsAppeared
              [FodderBeet].Leaf.PlantAppearedGreenLeafNo
              [FodderBeet].Structure.MainStemPopn
              [FodderBeet].Structure.TotalStemPopn
              [FodderBeet].Total.N
              [FodderBeet].Total.Wt
              [SurfaceOrganicMatter].Wt
              sum([Soil].SoilNitrogen.NO3.kgha) as TotalSoilNitrogen
              [FodderBeet].Phenology.FlagLeafDAS
              [FodderBeet].Phenology.FloweringDAS
              [FodderBeet].Phenology.MaturityDAS
              [FodderBeet].Phenology.PhotoPeriod
              [FodderBeet].Phenology.PhotoPeriodDeltaFunction
              [FodderBeet].Phenology.Stage
              [FodderBeet].Phenology.SoilTemperatureFunction
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