Simulations: Version=113
  DataStore
    ExcelInput Observed: FileNames=[Observed.xlsx]; SheetNames=[PLOT5]
    PredictedObserved: PredictedTableName=Report; ObservedTableName=PLOT5; FieldNameUsedForMatch=Date; AllColumns=false
    ExcelInput Analytical: SheetNames=[AnalyticalDataForAPSIM]
      FileNames=[C:\Users\holzworthdp\Repos\ApsimX\Prototypes\SoilTemperature\SoilTemperature-AnalyticalSolution.xlsx]
  Simulation Wagga
    Memo
      This simulation is a duplicate of the Eucalyptus validation Wagga simulation. The only change is the addition of the soil temperature model.
    Weather: FileName=%root%\Tests\Validation\Eucalyptus\wwepp.met
    Clock: Start=1991-07-01; End=1995-06-30
    Summary
    SoilArbitrator Soil Arbitrator
    Zone Plantation: Area=1; Slope=0; AspectAngle=0; Altitude=50
      Soil: Latitude=0; Longitude=0
        InitialWater Initial water: PercentMethod=1; FractionFull=0.8
        Physical
          Thickness  ParticleSizeClay  BD    AirDry  LL15  DUL   SAT
          100        9                 1.5   0.01    0.05  0.16  0.29
          300        11                1.6   0.01    0.05  0.15  0.29
          600        13                1.68  0.01    0.05  0.14  0.29
          1000       14                1.75  0.02    0.05  0.13  0.29
          1000       25                1.7   0.05    0.05  0.12  0.29
          1000       35                1.7   0.05    0.05  0.12  0.29
          1000       42                1.7   0.05    0.05  0.12  0.29
          1000       40                1.7   0.05    0.05  0.12  0.29
          SoilCrop EucalyptusSoil: LL=[0.01, 0.01, 0.01, 0.01, 0.01, 0.01, 0.01, 0.01]; KL=[0.07, 0.07, 0.05, 0.02, 0.02, 0.02, 0.01, 0.01]; XF=[1, 1, 1, 1, 0.3, 0.2, 0, 0]
          SoilCrop SCRUMSoil: LL=[0.01, 0.01, 0.01, 0.01, 0.01, 0.01, 0.01, 0.01]; KL=[0.07, 0.07, 0.05, 0.02, 0.02, 0.02, 0.01, 0.01]; XF=[1, 1, 1, 1, 0.3, 0.2, 0, 0]
        WaterBalance SoilWater: SummerDate=1-Nov; SummerU=4; SummerCona=3.5; WinterDate=1-Apr; WinterU=4; WinterCona=3.5; DiffusConst=88; DiffusSlope=35.4; Salb=0.13; CN2Bare=65; CNRed=20; CNCov=0.8; Slope=0; DischargeWidth=0; CatchmentArea=0
          Thickness  SWCON  KLAT
          100        0.9    0
          300        0.9    0
          600        0.9    0
          1000       0.6    0
          1000       0.6    0
          1000       0.6    0
          1000       0.6    0
          1000       0.6    0
        Organic: FOMCNRatio=60
          Thickness  Carbon  SoilCNRatio  FBiom  FInert  FOM
          100        2       14.5         0.04   0.4     0.29407
          300        1       14.5         0.03   0.5     0.253108
          600        0.5     14.5         0.02   0.5     0.187507
          1000       0.2     14.5         0.01   0.5     0.113729
          1000       0.12    14.5         0.01   0.9     0.06898
          1000       0.1     14.5         0.01   0.99    0.0418385
          1000       0.1     14.5         0.01   0.99    0.0253763
          1000       0.1     14.5         0.01   0.99    0.0153915
        Chemical
          Thickness  NO3N  NH4N  PH
          100        0.1   0.01  5.8
          300        0.1   0.01  5.7
          600        0.1   0.01  5.7
          1000       0.01  0.01  5.9
          1000       0.01  0.01  5.7
          1000       0.01  0.01  5.7
          1000       0.01  0.01  5.7
          1000       0.01  0.01  5.7
        Sample Initial nitrogen: Thickness=[100, 300, 600, 1000, 1000, 1000, 1000, 1000]; SWUnits=Volumetric; OCUnits=Total; PHUnits=Water
        CERESSoilTemperature
        Nutrient
        SoilTemperature
        LayerStructure: Thickness=[2, 2, 6, 10, 30, 50, 100, 100, 100, 100, 100]
      Irrigation
      Fertiliser
      SurfaceOrganicMatter: InitialResidueName=Wheat; InitialResidueType=Wheat; InitialResidueMass=2000; InitialStandingFraction=0; InitialCPR=0; InitialCNR=80
      MicroClimate: a_interception=0; b_interception=1; c_interception=0; d_interception=0; soil_albedo=0.13; SoilHeatFluxFraction=0; MinimumHeightDiffForNewLayer=0; NightInterceptionFraction=0; ReferenceHeight=0
      Plant Eucalyptus
      Plant SCRUM
      Manager TreeTransplantRule
        RowSpace = 3
        RowWidth = 3
        CultivarName = grandisCoffsHarbour
        SowingDate = 07/01/1991 00:00:00
```csharp
using Models.PMF;
using Models.Core;
using System;
namespace Models
{
    [Serializable] 
    [System.Xml.Serialization.XmlInclude(typeof(Model))]
    public class Script : Model
    {
        [Link] Plant Plant;
        [Link] Clock Clock;

        [Description("Spacing (m) between plants within rows")]
        public double RowSpace { get; set; }
        [Description("Spacing (m) between rows")]
        public double RowWidth { get; set; }

        [Description("Cultivar")]
        [Display(Type=DisplayType.CultivarName)]
        public string CultivarName { get; set; }
        [Description("Sowing Date")]
        public DateTime SowingDate { get; set; }

        [EventSubscribe("DoManagement")]
        private void OnDoManagement(object sender, EventArgs e)
        {
            double PlantPopulation = 1 / (RowWidth * RowSpace);

            if (Clock.Today.Date == SowingDate)
                Plant.Sow(population: PlantPopulation, 
                    cultivar: CultivarName, 
                    depth: 100, 
                    rowSpacing: 150);
            //Plant.Sow(... Contains the following arguements:
            //Population  double  Required  Seeds sowing/m2
            //Cultivar    string  Required  "NameOfCultivar"
            //Depth       double  Optional  Depth (mm) seed sown.   Default is 100mm 
            //MaxCover    double  Optional  Proportion (0-1) of the ground row crop will cover.   Default is 1.0
            //BudNumber   double  Optional  Number of mainstems per seed sown.  Default is 1.0
            //RowSpacing  double  Optional  Spaceing (mm) between drill rows when crop is sown.  Default is 150mm
            //CropClass   string  Optional  Crop class to instantiate when crop is sown.  Default is "Plant"
        }
    }
}
```
      Operations WeedSowing
        1991-07-01  [SCRUM].Sow(population: 1, cultivar: Barley_Autumn, depth: 10, rowSpacing: 150);
      Operations FertiliserOperations
        1987-02-09  [Fertiliser].Apply(192, Fertiliser.Types.UreaN, 0);
        1987-05-20  [Fertiliser].Apply(192, Fertiliser.Types.UreaN, 0);
        1987-08-28  [Fertiliser].Apply(96, Fertiliser.Types.UreaN, 0);
        1987-12-06  [Fertiliser].Apply(256, Fertiliser.Types.UreaN, 0);
        1988-02-29  [Fertiliser].Apply(256, Fertiliser.Types.UreaN, 0);
        1988-07-18  [Fertiliser].Apply(128, Fertiliser.Types.UreaN, 0);
        1988-10-26  [Fertiliser].Apply(192, Fertiliser.Types.UreaN, 0);
        1989-06-09  [Fertiliser].Apply(128, Fertiliser.Types.UreaN, 0);
        1989-10-27  [Fertiliser].Apply(96, Fertiliser.Types.UreaN, 0);
      Report: EventNames=[Clock].DoReport
        VariableNames:
          [Clock].Today as Date
          [Soil].SoilTemperature.AverageSoilTemp
          [Soil].SoilTemperature.AverageSoilTemp[1] as SoilTemperature@1
          [Soil].SoilTemperature.AverageSoilTemp[2] as SoilTemperature@25
          [Soil].SoilTemperature.AverageSoilTemp[3] as SoilTemperature@75
          [Soil].SoilTemperature.AverageSoilTemp[4] as SoilTemperature@150
          [Soil].SoilTemperature.AverageSoilTemp[5] as SoilTemperature@250
          [Eucalyptus].Age
          [Eucalyptus].AboveGround.Wt
          [Eucalyptus].BelowGround.Wt
          [Eucalyptus].Leaf.Dead.Wt
          [Eucalyptus].Leaf.Live.Wt
          [Eucalyptus].Branch.Live.Wt
          [Eucalyptus].Leaf.Detached.Wt
          [Eucalyptus].Stem.Live.Wt
          [Eucalyptus].Total.N
          [Eucalyptus].Leaf.Live.N
          [Eucalyptus].Wood.Wt
          [Eucalyptus].Leaf.CoverGreen
          [Eucalyptus].Leaf.LAI
          [Eucalyptus].TotalLive.Wt
          [Eucalyptus].IndividualTreeLiveWt
          [Eucalyptus].IndividualTreeStemWt
          [Eucalyptus].Stem.DBH
          [Eucalyptus].Stem.Ht
          [Eucalyptus].RootShootRatio
          [Eucalyptus].Stem.Vol
          [Eucalyptus].Stem.MAI
          [SCRUM].Stover.LAI
          [SCRUM].Stover.Wt
      Manager AutoFertigate
        FASW = 0
        WaterDeficit = 0
        AutoIrrigationOn = True
        FASWThreshold = 0.95
        FASWDepth = 1000
        NConc = 3
```csharp
using Models.Soils.Nutrients;
using System;
using Models.Core;
using System.Collections.Generic;
using System.Text;
using Models.Soils;
using Models.Soils.Nutrients;
using Models.PMF;
using Models;
using System.Xml.Serialization;
using APSIM.Shared.Utilities;

namespace Models
{
    [Serializable] 
    public class Script : Model
    {
        public double FASW { get; set; }
        public double WaterDeficit  { get; set; }
    
        [Link] Plant Chickpea;
        [Link] Zone zone;
        [Link] Irrigation irrigation;
        [Link] Fertiliser fertiliser;
        [Link] Soil soil;
        
        [Description("Auto irrigation on?")]
        public bool AutoIrrigationOn { get; set; }
        
        [Description("Threshold fraction available water (0-1)")]
        public double FASWThreshold { get; set; }

        [Description("Soil depth (mm) to which fraction available water is calculated")]
        public double FASWDepth { get; set; }

        [Description("N Concentration in irrigation water (ppm)")]
        public double NConc { get; set; }

        [EventSubscribe("DoManagement")]
        private void OnDoManagement(object sender, EventArgs e)
        {
            CalculateFASW();
            if (AutoIrrigationOn)
            {
                if (FASW < FASWThreshold)
                {
                    double amount = WaterDeficit * 10000.0 * NConc/1000000.0;
                    irrigation.Apply(WaterDeficit, depth: 0);
                    fertiliser.Apply(Amount: amount, Type: Fertiliser.Types.NO3N);
                }
            }
        }
        
        private void CalculateFASW()
        {
            double[] LL15 = MathUtilities.Multiply(soil.LL15, soil.Thickness);
            double[] DUL = MathUtilities.Multiply(soil.DUL, soil.Thickness);
        
            int nlayr = GetLayerIndex();
            double cumdep = MathUtilities.Sum(soil.Thickness, 0, nlayr, 0.0);

            double excess_fr = MathUtilities.Divide((cumdep - FASWDepth), soil.Thickness[nlayr], 0.0);

            // note that results may be strange if swdep < ll15
            double avail_sw = (MathUtilities.Sum(soil.Water, 0, nlayr, 0.0)
                              - excess_fr * soil.Water[nlayr])
                              - (MathUtilities.Sum(LL15, 0, nlayr, 0.0)
                              - excess_fr * LL15[nlayr]);


            double pot_avail_sw = (MathUtilities.Sum(DUL, 0, nlayr, 0.0)
                                  - excess_fr * DUL[nlayr])
                                  - (MathUtilities.Sum(LL15, 0, nlayr, 0.0)
                                  - excess_fr * LL15[nlayr]);

            FASW = MathUtilities.Divide(avail_sw, pot_avail_sw, 0.0);
            WaterDeficit = MathUtilities.Constrain(pot_avail_sw - avail_sw, 0.0, 100000);
        }

        private int GetLayerIndex()
        {
            double[] cumThickness = soil.ThicknessCumulative;
            for (int i = 1; i < cumThickness.Length; i++)
            {
                if (FASWDepth < cumThickness[i])
                    return i - 1;
            }
            
            return cumThickness.Length - 1;
        }

    }
}
```
      Manager Harvesting
        Crop = [Eucalyptus]
```csharp
using Models.Soils.Nutrients;
using System;
using Models.Core;
using Models.PMF;
using Models.Soils;
using Models.Soils.Nutrients;
using Models.Utilities;
using APSIM.Shared.Utilities;

namespace Models
{
    [Serializable] 
    public class Script : Model
    {
        [Description("Crop")]
        public IPlant Crop { get; set; }
        
        [EventSubscribe("DoManagement")]
        private void OnDoManagement(object sender, EventArgs e)
        {
            if (Crop.IsReadyForHarvesting)
            {
                Crop.Harvest();
                Crop.EndCrop();
            }
        }
    }
}
```
  Experiment Analytical
    Factors
      Factor Site: Specification=[Weather].ExcelWorkSheetName=Dalby,Lincoln
    Simulation ComparisonWithAnalytical
      Memo
        This simulation is a duplicate of the Eucalyptus validation Wagga simulation. The only change is the addition of the soil temperature model.
      Clock: Start=2000-01-01; End=2000-12-31
      Weather: FileName=AnalyticalWeather.xlsx; ExcelWorkSheetName=Sheet1
      Summary
      Zone Field: Area=1; Slope=0; AspectAngle=0; Altitude=50
        MicroClimate
          zero: a_interception, b_interception, c_interception, d_interception, soil_albedo, SoilHeatFluxFraction, MinimumHeightDiffForNewLayer, NightInterceptionFraction, ReferenceHeight
        Soil: Latitude=0; Longitude=0
          InitialWater Initial water: PercentMethod=1; FractionFull=1
          Physical
            Thickness  ParticleSizeClay  BD    AirDry  LL15  DUL   SAT
            100        9                 1.5   0.01    0.05  0.16  0.29
            100        11                1.6   0.01    0.05  0.15  0.29
            200        13                1.68  0.01    0.05  0.14  0.29
            300        14                1.75  0.02    0.05  0.13  0.29
            300        25                1.7   0.05    0.05  0.12  0.29
            300        35                1.7   0.05    0.05  0.12  0.29
            200        42                1.7   0.05    0.05  0.12  0.29
            300        40                1.7   0.05    0.05  0.12  0.29
          WaterBalance SoilWater: SummerDate=1-Nov; SummerU=4; SummerCona=3.5; WinterDate=1-Apr; WinterU=4; WinterCona=3.5; DiffusConst=88; DiffusSlope=35.4; Salb=0.13; CN2Bare=65; CNRed=20; CNCov=0.8; Slope=0; DischargeWidth=0; CatchmentArea=0
            Thickness  SWCON  KLAT
            100        0      0
            300        0      0
            600        0      0
            1000       0      0
            1000       0      0
            1000       0      0
            1000       0      0
            1000       0      0
          Organic: same as Wagga.Plantation.Soil.Organic
          Chemical: same as Wagga.Plantation.Soil.Chemical
          Sample Initial nitrogen: Thickness=[100, 300, 600, 1000, 1000, 1000, 1000, 1000]; SWUnits=Volumetric; OCUnits=Total; PHUnits=Water
          Nutrient
          SoilTemperature
        SurfaceOrganicMatter: InitialResidueName=Wheat; InitialResidueType=Wheat; InitialResidueMass=0; InitialStandingFraction=0; InitialCPR=0; InitialCNR=80
        Report AnalyticalReport: EventNames=[Clock].DoReport
          VariableNames:
            [Clock].Today as Date
            [Soil].SoilTemperature.AverageSoilTemp
            [Soil].SoilTemperature.AverageSoilTemp[1] as SoilTemperature@1
            [Soil].SoilTemperature.AverageSoilTemp[2] as SoilTemperature@20
            [Soil].SoilTemperature.AverageSoilTemp[6] as SoilTemperature@150
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