Simulations Functions toolbox: Version=2
  Folder Functions
    SoilTemperatureWeightedFunction
    SplineInterpolationFunction
    StageBasedInterpolation: Proportional=true
    SubtractFunction
    WeightedTemperatureFunction: MaximumTemperatureWeighting=0
    XYPairs
    Zadok
    AccumulateFunction
    AddFunction
    AgeCalculatorFunction
    AirTemperatureFunction
    BellCurveFunction
    Constant: Value=0
    DeltaFunction
    DivideFunction
    ExpressionFunction
    ExternalVariable
    ExponentialFunction: A=1; B=1; C=1
    HoldFunction
    InPhaseTtFunction
    LessThanFunction
    LinearInterpolationFunction
    MaximumFunction
    MinimumFunction
    MultiplyFunction
    OnEventFunction
    PhaseBasedSwitch
    PhaseLookup
    PhaseLookupValue
    PhotoperiodDeltaFunction: Twilight=0
    PhotoperiodFunction: Twilight=0
    PowerFunction: Exponent=1
    SigmoidFunction: Xmax=1; Xo=1; b=1
    SigmoidFunction2
    SoilTemperatureDepthFunction: Depth=0
    SoilTemperatureFunction: maxt_soil_surface=20; mint_soil_surface=10
  Folder DemandFunctions
    RelativeGrowthRateDemandFunction: InitialWt=0
    AllometricDemandFunction: Const=0; Power=0
    FillingRateFunction
    InternodeDemandFunction
    PartitionFractionDemandFunction
    PopulationBasedDemandFunction
    PotentialSizeDemandFunction
  Folder StructureFunctions
    MainStemFinalNodeNumberFunction: MaximumMainStemNodeNumber=0
    HeightFunction
    InPhaseTemperatureFunction
  Folder SupplyFunctions
    RUEModel
    RUECO2Function
