Simulations: Version=2
  Replacements
    Plant Sorghum: CropType=Sorghum
      Memo TitlePage
        The APSIM Sorghum Model

        McLean, G., Brider, J., Doherty, A.

        The APSIM sorghum model has been developed using the Plant Modelling Framework (PMF) of Brown et al(2014).
        This new framework provides a library of plant organ and process submodels that can be coupled, at runtime, to construct a model in much the same way that models can be coupled to construct a simulation. This means that dynamic composition of lower level process and organ classes (e.g. photosynthesis, leaf) into larger constructions (e.g. sorghum, wheat, sorghum) can be achieved by the model developer without additional coding.
      OrganArbitrator Arbitrator: NArbitrationOption=PriorityThenRelativeAllocation; DMArbitrationOption=RelativeAllocation
      CompositeBiomass AboveGroundLive: Propertys=[[Leaf].Live, [Stem].Live, [Grain].Live, [Rachis].Live]
        Memo
          The AboveGroundLive composite biomass object includes the Live pools of all organs occurring above the soil surface to allow output for total dry matter and Nutrient contents, including total structural, non-structural and metabolic pools.
      CompositeBiomass AboveGroundDead: Propertys=[[Leaf].Dead, [Stem].Dead, [Grain].Dead, [Rachis].Dead]
        Memo
          The AboveGroundDead composite biomass object includes the Dead pools of all organs occurring above the soil surface to allow output for total dry matter and Nutrient contents, including total structural, non-structural and metabolic pools.
      AddFunction TotalPlantDemand
        VariableReference LeafDemand: VariableName=[Leaf].DMDemandFunction.Value
        VariableReference StemDemand: VariableName=[Stem].DMDemandFunction.Value
        VariableReference RachisDemand: VariableName=[Rachis].DMDemandFunction.Value
        VariableReference GrainDemand: VariableName=[Grain].DMDemandFunction.Value
      Phenology: DaysAfterSowing=0
        Memo
          The phenology model used in the APSIM sorghum model follows the approach used in earlier sorghum models(Jones and Kiniry (1986), Carberry and Arbrecht (1991), Carberry et al (1989).
          The model predicts development of primordia on the apex of the main stem and appearance of individual leaves to predict time to flag leaf.  Other stages use thermal time targets.
        MultiplyFunction ThermalTime
          PhaseLookup TT
            PhaseLookupValue TT: Start=Germination; End=Flowering
              AirTemperatureFunction ThermalTime
                XYPairs: X=[11, 30, 42]; Y=[0, 19, 0]
            PhaseLookupValue TTFM: Start=Flowering; End=Maturity
              AirTemperatureFunction ThermalTime
                XYPairs: X=[5.7, 23.5]; Y=[0, 17.8]
        GerminatingPhase Germinating: Start=Sowing; End=Germination
        EmergingPhase Emerging: Start=Germination; End=Emergence; ShootLag=15; ShootRate=0.6
          VariableReference ThermalTime: VariableName=[Phenology].ThermalTime.Value
        GenericPhase Juvenile: Start=Emergence; End=EndJuvenile
          Constant Target: Value=100
          VariableReference ThermalTime: VariableName=[Phenology].ThermalTime.Value
        GenericPhase JuvenileToFloralInit: Start=EndJuvenile; End=FloralInitiation
          VariableReference ThermalTime: VariableName=[Phenology].ThermalTime.Value
          VariableReference Target: VariableName=[Phenology].TTTargetPhotoSensitive.Value
        GenericPhase FloralInitToFlagLeaf: Start=FloralInitiation; End=FlagLeaf
          VariableReference ThermalTime: VariableName=[Phenology].ThermalTime.Value
          SubtractFunction Target
            VariableReference TTEmergToFlag: VariableName=[Phenology].TTEmergToFlagLeaf.Value
            VariableReference TTJuvenile: VariableName=[Phenology].Juvenile.Target.Value
            VariableReference TTJuvToFloralInit: VariableName=[Phenology].JuvenileToFloralInit.Target.Value
        GenericPhase FlagLeafToFlowering: Start=FlagLeaf; End=Flowering
          Constant Target: Value=170
          VariableReference ThermalTime: VariableName=[Phenology].ThermalTime.Value
        GenericPhase FloweringToGrainFilling: Start=Flowering; End=StartGrainFill
          Constant Target: Value=80
          VariableReference ThermalTime: VariableName=[Phenology].ThermalTime.Value
        GenericPhase GrainFilling: Start=StartGrainFill; End=EndGrainFill
          VariableReference ThermalTime: VariableName=[Phenology].ThermalTime.Value
          SubtractFunction Target
            VariableReference FlowerToMaturity: VariableName=[Phenology].TTFIowerToMaturity.Value
            VariableReference FlowerToGrainFill: VariableName=[Phenology].FloweringToGrainFilling.Target.Value
            VariableReference GrainFillToMaturity: VariableName=[Phenology].TTGrainFillToMaturity.Value
        GenericPhase Maturing: Start=EndGrainFill; End=Maturity
          VariableReference ThermalTime: VariableName=[Phenology].ThermalTime.Value
          VariableReference Target: VariableName=[Phenology].TTGrainFillToMaturity.Value
        GenericPhase MaturityToHarvestRipe: Start=Maturity; End=HarvestRipe
          Constant Target: Value=1
          VariableReference ThermalTime: VariableName=[Phenology].ThermalTime.Value
        EndPhase ReadyForHarvesting: Start=HarvestRipe; End=Unused
          VariableReference ThermalTime: VariableName=[Phenology].ThermalTime.Value
        PhotoperiodFunction Photoperiod: Twilight=-6; DayLength=0
        OnEventFunction FloweringDAS: SetEvent=Flowering; ReSetEvent=never
          Memo
            A function is used to provide flowering date as days after sowing(DAS).
          Constant PreEventValue: Value=0
          VariableReference PostEventValue: VariableName=[Phenology].DaysAfterSowing
        OnEventFunction MaturityDAS: SetEvent=Maturity; ReSetEvent=never
          Memo
            A function is used to provide maturity date as days after sowing(DAS).
          Constant PreEventValue: Value=0
          VariableReference PostEventValue: VariableName=[Phenology].DaysAfterSowing
        Constant TTFIowerToMaturity: Value=761
        Constant TTEndJuvToInit: Value=160
        MultiplyFunction TTGrainFillToMaturity
          VariableReference FlowerToMaturity: VariableName=[Phenology].TTFIowerToMaturity.Value
          Constant Proportion: Value=0.05
        OnEventFunction TTTargetPhotoSensitive: SetEvent=EndJuvenile; ReSetEvent=never
          VariableReference PreEventValue: VariableName=[Phenology].TTEndJuvToInit.Value
          AddFunction PostEventValue
            LinearInterpolationFunction PhotoModifier: XProperty=[Phenology].Photoperiod.Value
              XYPairs: X=[11.5, 13.5]; Y=[0, 23]
            VariableReference TTEndJuvToInit: VariableName=[Phenology].TTEndJuvToInit.Value
        Constant FinalLeafNo: Value=17.101
        Constant LeafNoAtEmergence: Value=1
        Constant LeafNoRateChange: Value=3.5
        AddFunction TTEmergToFlagLeaf
          MultiplyFunction LeafAppearingPhase1
            SubtractFunction NoLeavesRate1
              VariableReference FinalLeafNo: VariableName=[Phenology].FinalLeafNo.Value
              VariableReference LeafNoAtEmergence: VariableName=[Phenology].LeafNoAtEmergence.Value
              VariableReference LeafNoRateChange: VariableName=[Phenology].LeafNoRateChange.Value
            Constant LeafAppearanceRate1: Value=41
          MultiplyFunction LeafAppearingPhase2
            Constant LeafAppearanceRate2: Value=20
            VariableReference LeafNoRateChange: VariableName=[Phenology].LeafNoRateChange.Value
        AccumulateFunction TTFromEmergence: StartStageName=Emergence; EndStageName=Maturity
          VariableReference ThermalTime: VariableName=[Phenology].ThermalTime.Value
        AccumulateFunction TTFMFromFlowering: StartStageName=Flowering; EndStageName=Maturity
          VariableReference ThermalTime: VariableName=[Phenology].ThermalTime.Value
        AddFunction TTEmergToFloralInit
          VariableReference TTTargetJuvenille: VariableName=[Phenology].Juvenile.Target.Value
          VariableReference TTTargetJuvToFI: VariableName=[Phenology].JuvenileToFloralInit.Target.Value
      Structure: Initialised=false; Germinated=false; Emerged=false
        Memo
          Though tillering is common in some sorghum varieties under certain agronomic conditions, no tillering is accounted for within this model.  Therefore all branching has been parameterised out of the current sorghum model.
        VariableReference ThermalTime: VariableName=[Phenology].ThermalTime.Value
        LessThanFunction MainStemNodeAppearanceRate
          VariableReference CurrentLeafNum: VariableName=[Structure].LeafTipsAppeared
          SubtractFunction
            VariableReference FinalLeafNum: VariableName=[Structure].MainStemFinalNodeNumber.Value
            Constant LeafNumRateChange: Value=3.5
          Constant LeafAppRate1: Value=41
          Constant LeafAppRate2: Value=20
        HoldFunction MainStemFinalNodeNumber: WhenToHold=FloralInitiation
          AddFunction ValueToHold
            VariableReference LeafNumSeed: VariableName=[Structure].LeafNumSeed.Value
            DivideFunction
              VariableReference TTEmergToFI: VariableName=[Phenology].TTEmergToFloralInit.Value
              VariableReference LeafInitRate: VariableName=[Structure].LeafInitiationRate.Value
        HeightFunction HeightModel
          LinearInterpolationFunction PotentialHeight: XProperty=[Phenology].Stage
            XYPairs: X=[3, 4, 5, 6]; Y=[20, 50, 60, 1700]
        Constant BranchingRate: Value=0
        Constant ShadeInducedBranchMortality: Value=0
        Constant DroughtInducedBranchMortality: Value=0
        Constant LeafNumSeed: Value=4
        Constant LeafInitiationRate: Value=21.6
        Constant PlantMortality: Value=0
        VariableReference MainStemPrimordiaInitiationRate: VariableName=[Structure].LeafInitiationRate.Value
        Constant BranchMortality: Value=0
      ReproductiveOrgan Grain: GrowthRespiration=0; MaintenanceRespiration=0
        Constant InitialGrainProportion: Value=0.05
        Constant MaximumPotentialGrainSize: Value=0.3
        Biomass Live
        Biomass Dead
        Constant MinimumNConc: Value=0.008
        PhaseLookup MaximumNConc
          PhaseLookupValue InitialPhase: Start=Flowering; End=StartGrainFill
            Constant InitialNconc: Value=0.05
          PhaseLookupValue LinearPhase: Start=StartGrainFill; End=EndGrainFill
            Constant FinalNconc: Value=0.013
        Constant WaterContent: Value=0.12
        PhaseLookup NFillingRate
          PhaseLookupValue GrainFilling: Start=Flowering; End=EndGrainFill
            FillingRateFunction
              VariableReference NumberFunction: VariableName=[Grain].NumberFunction.Value
              AddFunction FillingDuration
                VariableReference FloweringToGrainFilling: VariableName=[Phenology].FloweringToGrainFilling.Target.Value
                VariableReference GrainFilling: VariableName=[Phenology].GrainFilling.Target.Value
              VariableReference ThermalTime: VariableName=[Phenology].ThermalTime.Value
              MultiplyFunction PotentialSizeIncrement
                Constant MaximumFinalNConc: Value=0.013; Units=g/g
                VariableReference MaximumSize: VariableName=[Grain].MaximumPotentialGrainSize.Value
        MultiplyFunction NumberFunction
          MinimumFunction
            VariableReference FinalGrainNum: VariableName=[Grain].FinalGrainNum.Value
            MultiplyFunction
              VariableReference FinalGrainNum: VariableName=[Grain].FinalGrainNum.Value
              DivideFunction
                VariableReference TTStartGrainToNow: VariableName=[Grain].TTStartGrainToNow.Value
                Constant RampTT: Value=100
          Constant TemperatureFactor: Value=1
        OnEventFunction FinalGrainNum: SetEvent=StartGrainFill
          Constant PreEventValue: Value=0
          DivideFunction PostEventValue
            DivideFunction GrowthRate
              SubtractFunction PlantGrowth
                AddFunction TotalPlantWt
                  VariableReference LiveWt: VariableName=[Sorghum].AboveGroundLive.Wt
                  VariableReference DeadWt: VariableName=[Sorghum].AboveGroundDead.Wt
                VariableReference GreenWtAtFI: VariableName=[Grain].GreenWtAtFI.Value
              VariableReference DaysFIToStartGF: VariableName=[Grain].DaysFIToStartGrainFill.Value
            Constant DMPerSeed: Value=0.00083
        AccumulateFunction DaysFIToStartGrainFill: StartStageName=FloralInitiation; EndStageName=StartGrainFill
          Constant One: Value=1
        OnEventFunction GreenWtAtFI: SetEvent=StartGrainFill
          Constant PreEventValue: Value=0
          VariableReference PostEventValue: VariableName=[Sorghum].AboveGroundLive.Wt
        AccumulateFunction TTStartGrainToNow: StartStageName=StartGrainFill; EndStageName=Maturity
          VariableReference ThermalTime: VariableName=[Phenology].ThermalTime.Value
        DivideFunction DMCaryopsis
          VariableReference DMFixationSupply: VariableName=[Arbitrator].DMSupply
          VariableReference GrainNumber: VariableName=[Grain].NumberFunction.Value
          VariableReference ThermalTime: VariableName=[Phenology].ThermalTime.Value
        MinimumFunction PotGrainFillRate
          MultiplyFunction
            AddFunction
              MultiplyFunction
                VariableReference DMCaryopsis: VariableName=[Grain].DMCaryopsis.Value
                Constant: Value=0.4026
              Constant: Value=3.19E-05
            Constant: Value=1000
          Constant MaxGrainFillRate: Value=0.09
        MultiplyFunction DMDemandFunction
          VariableReference GrainFillRate: VariableName=[Grain].PotGrainFillRate.Value
          VariableReference ThermalTime: VariableName=[Phenology].ThermalTime.Value
          VariableReference GrainNumber: VariableName=[Grain].NumberFunction.Value
          Constant: Value=0.001
        Constant DMDemandFunction33: Value=0
      Root: GrowthRespiration=0; MaintenanceRespiration=0
        CompositeBiomass Live: Propertys=[[Root].LayerLive]
        CompositeBiomass Dead: Propertys=[[Root].LayerDead]
        LinearInterpolationFunction KLModifier: XProperty=[Sorghum].Population
          Memo
            The parameter KL is is described by Meinke et al (1993) to combine elements of soil conductivity (K) with root length (L) in determining root water uptake.  Peake et al (2013) demonstrated that in sorghum KL varied with plant population through impacts on root length density.  Here we adjust KL linearly with plant population.
          XYPairs: X=[0, 10]; Y=[1, 1]
        Constant SoilWaterEffect: Value=1
          Memo
            No effect of soil water content on root growth is currently captured in the model.
        Constant TemperatureEffect: Value=1
          Memo
            No effect of temperature on root growth is currently captured in the model.
        Constant MaxDailyNUptake: Value=20
          Memo
            Maximum daily N uptake is set to an arbitrarily high value.
        Constant SenescenceRate: Value=0.005
          Memo
            Jones and Kiniry (1986) used a constant root senescence fraction in the CERES-Sorghum model.
        Constant StructuralFraction: Value=1
        Constant MaximumNConc: Value=0.01
        Constant MinimumNConc: Value=0.01
        Constant MaximumRootDepth: Value=1000000
        LinearInterpolationFunction PartitionFraction: XProperty=[Phenology].Stage
          XYPairs: X=[-, 1, 2, 3, 4, 5, 6, 7]; Y=[-, 0, 1, 1, 0.33, 0.33, 0.087, 0]
        PhaseLookup RootFrontVelocity
          Memo
            Hammer et al (2009) used a constant extraction front velocity of 2.5cm per day in their analysis of historical sorghum yield trends in the US corn belt.
          PhaseLookupValue PreFlowering: Start=Germination; End=Flowering
            Constant Function: Value=25
          PhaseLookupValue PostFlowering: Start=Flowering; End=Maturity
            Constant Function: Value=0
        PhaseBasedSwitch NitrogenDemandSwitch: Start=Germination; End=Maturity
        LinearInterpolationFunction KNO3: XProperty=[Root].RootLengthDenisty
          XYPairs: X=[0, 0.003]; Y=[0.03, 0.03]
        LinearInterpolationFunction NUptakeSWFactor: XProperty=[Root].RWC
          XYPairs: X=[0, 0.2, 1]; Y=[1, 1, 1]
        LinearInterpolationFunction KNH4: XProperty=[Root].RootLengthDenisty
          XYPairs: X=[0, 0.003]; Y=[0.03, 0.03]
        MultiplyFunction DMDemandFunction1
          VariableReference PartitionFrac: VariableName=[Root].PartitionFraction.Value
          VariableReference BiomassProduction: VariableName=[Leaf].DMSupplyFixation.Value
        Constant InitialDM: Value=0.2; Units=g/plant
        Constant SpecificRootLength: Value=40; Units=m/g
      SimpleLeaf Leaf: CohortsInitialised=false; R50=200; KDead=0.03
        zero: GrowthRespiration, MaintenanceRespiration, TipsAtEmergence, CohortsAtInitialisation, InitialisedCohortNo, AppearedCohortNo, PlantAppearedLeafNo, Albedo, Gsmax, LAI, Height, FRGR, PotentialEP, LAIDead, WaterAllocation
        Biomass Live
        Biomass Dead
        RUEModel Photosynthesis
          WeightedTemperatureFunction FT: MaximumTemperatureWeighting=0.5
            XYPairs: X=[0, 8, 20, 35, 50]; Y=[0, 0, 1, 1, 0]
          RUECO2Function FCO2: PhotosyntheticPathway=C4
          VariableReference RadnInt: VariableName=[Leaf].RadIntTot
          Constant FVPD: Value=1
          Constant FN: Value=1
          Constant FW: Value=1
          Constant RUE: Value=1.25
        Constant StructuralFraction: Value=1; Units=0-1
        MultiplyFunction InitialWtFunction
          Constant InitialPlantWt: Value=0; Units=g/plant
          VariableReference Population: VariableName=[Plant].Population
        Constant LaiDeadFunction: Value=0; Units=m^2/m^2
        MultiplyFunction ExtinctionCoefficientFunction
          LinearInterpolationFunction PotentialExtinctionCoeff: XProperty=[Sorghum].SowingData.RowSpacing
            XYPairs: X=[0.2, 0.5, 1]; Y=[0.7, 0.4, 0.4]
        LinearInterpolationFunction FrostFraction: XProperty=[Weather].MinT
          XYPairs: X=[-10, -9]; Y=[1, 0]
        MinimumFunction FRGRFunction
          VariableReference RUE_FT: VariableName=[Leaf].Photosynthesis.FT.Value
          MinimumFunction Others
            VariableReference RUE_FN: VariableName=[Leaf].Photosynthesis.FN.Value
            VariableReference RUE_FVPD: VariableName=[Leaf].Photosynthesis.FVPD.Value
        VariableReference ThermalTime: VariableName=[Phenology].ThermalTime.Value
        Constant FTN: Value=0.1
        MultiplyFunction TPLAMax
          Constant cm2Tomm2: Value=100
          PowerFunction: Exponent=1
            AddFunction
              VariableReference FTN: VariableName=[Leaf].FTN.Value
              Constant One: Value=1
            Constant TillerCoeff: Value=0.66
          PowerFunction PowerFunction1: Exponent=1
            VariableReference FLN: VariableName=[Phenology].FinalLeafNo.Value
            Constant MainStemCoeff: Value=2.9
        Constant NConc: Value=1000
        Constant HeightFunction: Value=10
        LessThanFunction Exponent
          VariableReference TTFromEmergence: VariableName=[Phenology].TTFromEmergence.Value
          Constant: Value=80
          MultiplyFunction
            Constant TPLAProductionCoeff: Value=0.018
            SubtractFunction
              Constant: Value=80
              MultiplyFunction TPLAInflection
                Constant TPLAInlectionRatio: Value=0.66
                VariableReference TTEmergToFlagLeaf: VariableName=[Phenology].TTEmergToFlagLeaf.Value
          MultiplyFunction MultiplyFunction1
            Constant TPLAProductionCoeff: Value=0.018
            SubtractFunction
              VariableReference TTFromEmergence: VariableName=[Phenology].TTFromEmergence.Value
              MultiplyFunction TPLAInflection
                Constant TPLAInlectionRatio: Value=0.66
                VariableReference TTEmergToFlagLeaf: VariableName=[Phenology].TTEmergToFlagLeaf.Value
        MultiplyFunction TPLAInflection
          Constant TPLAInlectionRatio: Value=0.66
          VariableReference TTEmergToFlagLeaf: VariableName=[Phenology].TTEmergToFlagLeaf.Value
        MultiplyFunction LAIFunction
          Constant cm2tom2: Value=1E-06
          VariableReference TPLA: VariableName=[Leaf].TPLA.Value
          VariableReference Population: VariableName=[Sorghum].SowingData.Population
        LessThanFunction TPLA
          VariableReference TTFromEmergence: VariableName=[Phenology].TTFromEmergence.Value
          Constant: Value=80
          AddFunction
            Constant: Value=200
            MultiplyFunction
              DivideFunction
                VariableReference TTFromEmergence: VariableName=[Phenology].TTFromEmergence.Value
                Constant: Value=80
              VariableReference TPLAToday: VariableName=[Leaf].TPLAToday.Value
          VariableReference TPLAToday: VariableName=[Leaf].TPLAToday.Value
        DivideFunction TPLAToday
          VariableReference TPLAMax: VariableName=[Leaf].TPLAMax.Value
          AddFunction
            Constant: Value=1
            ExponentialFunction ExpFunc: A=0; B=1; C=-1
              VariableReference Exponent: VariableName=[Leaf].Exponent.Value
        DivideFunction LeafPartitioningCoefficient
          Constant One: Value=1
          AddFunction
            Constant One: Value=1
            MultiplyFunction
              VariableReference PartitionRate: VariableName=[Leaf].PartitionRate.Value
              PowerFunction: Exponent=2
                VariableReference LeafNumber: VariableName=[Structure].LeafTipsAppeared
        Constant PartitionRate: Value=0.006
        PhaseLookup DMDemandFunction
          PhaseLookupValue BetweenEmergenceAndFlag: Start=Emergence; End=FlagLeaf
            MultiplyFunction
              VariableReference LeafPartitionCoeff: VariableName=[Leaf].LeafPartitioningCoefficient.Value
              VariableReference DMFixationSupply: VariableName=[Leaf].DMSupplyFixation.Value
        SubtractFunction DMRemaining
          VariableReference DMFixationSupply: VariableName=[Leaf].DMSupplyFixation.Value
          VariableReference LeafDMDemand: VariableName=[Leaf].DMDemandFunction.Value
        Constant MinimumNConc: Value=0
        Constant MaximumNConc: Value=100
        Constant NReallocationFactor: Value=0
        Constant SenescenceRate: Value=0
        Constant DetachmentRateFunction: Value=0
        TEWaterDemandFunction
          Constant SVPFrac: Value=0.75
          Constant TranspirationEfficiencyCoefficient: Value=0.009
          VariableReference Photosynthesis: VariableName=[Leaf].Photosynthesis.Value
        MinimumFunction DMSupplyFixation
          VariableReference BiomTE: VariableName=[Leaf].BiomTE.Value
          VariableReference BiomRUE: VariableName=[Leaf].Photosynthesis.Value
        MultiplyFunction BiomTE
          DivideFunction TE
            VariableReference TECoeff
              VariableName=[Leaf].TEWaterDemandFunction.TranspirationEfficiencyCoefficient.Value
            VariableReference VPD: VariableName=[Leaf].TEWaterDemandFunction.VPD
            Constant g2mm: Value=0.001
          VariableReference WaterSupply: VariableName=[Arbitrator].WSupply
      GenericOrgan Rachis: GrowthRespiration=0; MaintenanceRespiration=0
        MultiplyFunction CobNumber
          VariableReference StemNumber: VariableName=[Structure].TotalStemPopn
          Constant CobsPerStem: Value=1.1
        DivideFunction CobSize
          VariableReference CobMass: VariableName=[Rachis].Live.Wt
          VariableReference CobNumber: VariableName=[Rachis].CobNumber.Value
        Biomass Live
        Biomass Dead
        Constant NReallocationFactor: Value=0
        Constant NRetranslocationFactor: Value=0.1
        Constant MaximumNConc: Value=0.008
        Constant StructuralFraction: Value=1
        Constant SenescenceRate: Value=0; Units=/d
        Constant MinimumNConc: Value=0.003
        LinearInterpolationFunction ExpansionStress: XProperty=[Sorghum].WaterSupplyDemandRatio
          XYPairs: X=[0, 0.6]; Y=[1, 1]
        PhaseLookup DMDemandFunction
          PhaseLookupValue BetweenFIAndFlower: Start=FloralInitiation; End=Flowering
            MultiplyFunction
              VariableReference DMRemainingAfterLeaf: VariableName=[Leaf].DMRemaining.Value
              VariableReference Stem2FlowerFrac: VariableName=[Stem].StemToFlowerFrac.Value
          PhaseLookupValue BetweenFlagAndFlowering: Start=FlagLeaf; End=Flowering
            MultiplyFunction
              VariableReference DMFixationSupply: VariableName=[Arbitrator].DMSupply
              VariableReference Stem2FlowerFrac: VariableName=[Stem].StemToFlowerFrac.Value
        Constant InitialWtFunction: Value=0; Units=g/m^2
        Constant DetachmentRateFunction: Value=0; Units=/d
        Constant InitialWtFunction1: Value=0; Units=g/m^2
      GenericOrgan Stem: GrowthRespiration=0; MaintenanceRespiration=0
        Biomass Live
        Biomass Dead
        LinearInterpolationFunction MaximumNConc: XProperty=[Structure].LeafTipsAppeared
          XYPairs: X=[1, 10, 11]; Y=[0.03, 0.03, 0.005]
        Constant MinimumNConc: Value=0.006
        PhaseBasedSwitch NitrogenDemandSwitch: Start=Emergence; End=StartGrainFill
        Constant NReallocationFactor: Value=0
        Constant NRetranslocationFactor: Value=0.5
        Constant DMRetranslocationFactor: Value=0.5
        Constant StemToFlowerFrac: Value=0.3
        MaximumFunction DMDemandFunction
          SubtractFunction DMDemandFunction
            VariableReference DMFixationSupply: VariableName=[Arbitrator].DMSupply
            VariableReference LeafDemand: VariableName=[Leaf].DMDemandFunction.Value
            VariableReference RachisDemand: VariableName=[Rachis].DMDemandFunction.Value
            VariableReference GrainDemand: VariableName=[Grain].DMDemandFunction.Value
          Constant Zero: Value=0
        Constant SenescenceRate: Value=0; Units=/d
        Constant StructuralFraction: Value=0.8
        Constant InitialWtFunction: Value=0; Units=g/m^2
        Constant DetachmentRateFunction: Value=0; Units=/d
      Cultivar Buster
      Cultivar M351: Command=[Phenology].TTEndJuvToInit.Value = 200
      Cultivar CSH13r: Command=[Phenology].TTEndJuvToInit.Value = 220
      Cultivar QL41xQL36: Command=[Phenology].TTEndJuvToInit.Value = 220
      Cultivar ATx623xRTx430: Command=[Phenology].TTEndJuvToInit.Value = 220
      Cultivar QL39xQL36: Command=[Phenology].TTEndJuvToInit.Value = 220
      Cultivar A35xQL36: Command=[Phenology].TTEndJuvToInit.Value = 220
  DataStore
    ExcelInput Hermitage: FileName=Observed.xlsx; SheetNames=[Hermitage]
    ExcelInput ICRISAT: FileName=Observed.xlsx; SheetNames=[ICRISAT]
    ExcelInput OldModel: FileName=SorgValModel.xlsx; SheetNames=[OldModel]
  Folder Experiments
    Experiment HE1
      Memo
        This trial was conducted at Hermitage Research Station in early 1997, and is linked with HE2, HE3 and HE4.  It consisted of 3 Genotypes: Buster, an Australian commercial line, M35-1, an Indian Rabi season landrace, and QL41/QL36, an Australian sorghum check for ... It was grown under non-limiting water and nitrogen conditions. Yields were around 6.5 t/ha for the Australian hybrids and 3 t/ha for the Indian landrace.
      Factors
        Factor Genotype
          Factor Buster: Specifications=[operations]
            Operations
              1997-01-09  [Sorghum].Sow(population:10, cultivar:"Buster", depth:30, rowSpacing:500);
      Simulation HE1: Area=0; Slope=0
        Clock: StartDate=1996-12-01; EndDate=1997-06-30
        Summary summaryfile
        Weather: FileName=HE1.met
        SoilArbitrator Soil Arbitrator
        Zone paddock: Area=1; Slope=0
          Operations
            1997-01-09  [Sorghum].Sow(population:10, cultivar:"Buster", depth:30, rowSpacing:500);
          Soil HRS: SoilType=HMM; Site=HRS; NearestTown=Unknown; Region=SE Queensland; NaturalVegetation=Unknown; Latitude=0; Longitude=0; Area=0
            Water
              Thickness  BD    AirDry  LL15   DUL   SAT
              100        1.34  0.08    0.226  0.42  0.45
              100        1.34  0.19    0.226  0.42  0.45
              200        1.33  0.23    0.258  0.46  0.48
              200        1.38  0.26    0.27   0.46  0.47
              200        1.4   0.26    0.268  0.43  0.45
              200        1.55  0.28    0.304  0.4   0.41
              200        1.59  0.25    0.335  0.37  0.38
              200        1.63  0.28    0.33   0.33  0.37
              200        1.66  0.3     0.32   0.32  0.37
              200        1.68  0.31    0.33   0.33  0.36
              SoilCrop SorghumSoil
                LL=[0.226, 0.226, 0.258, 0.27, 0.268, 0.304, 0.335, 0.33, 0.32, 0.33]
                KL=[0.07, 0.07, 0.07, 0.07, 0.06, 0.06, 0.06, 0.05, 0.05, 0.04]
                XF=[1, 1, 1, 1, 1, 1, 1, 1, 1, 1]
            SoilWater: SummerDate=1-Nov; SummerU=1.5; SummerCona=6.5; WinterDate=1-Apr; WinterU=1.5; WinterCona=6.5; DiffusConst=40; DiffusSlope=16; Salb=0.2; CN2Bare=85; CNRed=20; CNCov=0.8; max_pond=0; Thickness=[100, 100, 200, 200, 200, 200, 200, 200, 200, 200]; SWCON=[0.3, 0.3, 0.3, 0.3, 0.3, 0.3, 0.3, 0.3, 0.3, 0.3]; residueinterception=0
            SoilNitrogen: fom_type=[default, manure, mucuna, lablab, shemp, stable]; fract_carb=[0.2, 0.3, 0.54, 0.57, 0.45, 0]; fract_cell=[0.7, 0.3, 0.37, 0.37, 0.47, 0.1]; fract_lign=[0.1, 0.4, 0.09, 0.06, 0.08, 0.9]; wfpsN2N2O_x=[22, 88]; wfpsN2N2O_y=[0.1, 1]
            SoilOrganicMatter: RootCN=50; RootWt=1000; SoilCN=12.5; EnrACoeff=7.4; EnrBCoeff=0.2; OCUnits=Total
              Thickness  OC    FBiom  FInert
              100        1.19  0.05   0.45
              100        0.59  0.02   0.6
              200        0.45  0.01   0.75
              200        0.3   0.01   0.9
              200        0.2   0.01   0.9
              200        0.16  0.01   0.9
              200        0.17  0.01   0.9
              200        0.17  0.05   0.9
              200        0.17  0.02   0.9
              200        0.17  0.01   0.9
            Analysis: Thickness=[100, 100, 200, 200, 200, 200, 200, 200, 200, 200]; PH=[6.3, 6.4, 6.5, 6.6, 6.6, 6.5, 6.5, 6.5, 6.5, 6.5]; PHUnits=Water; BoronUnits=HotWater
            Sample Initial Water: Thickness=[100, 100, 200, 200, 200, 200, 200, 200, 200, 200]; NO3Units=ppm; NH4Units=ppm; SWUnits=Volumetric; OCUnits=Total; PHUnits=Water
              SW=[0.235, 0.252, 0.27, 0.3, 0.268, 0.304, 0.335, 0.33, 0.32, 0.33]
            Sample Initial Nitrogen: NO3Units=kgha; NH4Units=ppm; SWUnits=Volumetric; OCUnits=Total; PHUnits=Water
              Thickness  NO3    NH4  PH
              100        10.4   0.1  7
              100        1.633  0.1  7
              200        1.233  0.1  7
              200        0.9    0.1  7
              200        1.1    0.1  7
              200        1.467  0.1  7
              200        3.633  0.1  7
              200        5.667  0.1  7
              200        5.8    0.1  7
              200        7.267  0.1  7
          Plant Sorghum: CropType=Sorghum
          SurfaceOrganicMatter: PoolName=wheat_stubble; type=wheat; mass=0; standing_fraction=0; cpr=0; cnr=80; CriticalResidueWeight=2000; OptimumDecompTemp=20; MaxCumulativeEOS=20; CNRatioDecompCoeff=0.277; CNRatioDecompThreshold=25; TotalLeachRain=25; MinRainToLeach=10; CriticalMinimumOrganicC=0.004; DefaultCPRatio=0; DefaultStandingFraction=0; StandingExtinctCoeff=0.5; FractionFaecesAdded=0.5
            Pools:
              {PoolName=wheat_stubble, ResidueType=wheat, Mass=0, CNRatio=80, CPRatio=0, StandingFraction=0}
            ResidueTypes ResidueTypesList: LoadFromResource=ResidueTypes
          MicroClimate: a_interception=0; b_interception=1; c_interception=0; d_interception=0; soil_albedo=0.23; air_pressure=1010; soil_emissivity=0.96; sun_angle=15; soil_heat_flux_fraction=0.4; night_interception_fraction=0.5; windspeed_default=3; refheight=2; albedo=0.15; emissivity=0.96; gsmax=0.01; r50=200; RadIntTotal=0
          Fertiliser
          Irrigation
          Report
            VariableNames:
              [Clock].Today
              [Clock].Today.Year as year
              [Clock].Today.DayOfYear as doy
              [Clock].Today.Date as date
              [Phenology].ThermalTime.Value as TT
              [Sorghum].DaysAfterSowing
              [SorghumSowingRule].Script.DaysAfterSowing as das
              [Sorghum].Phenology.Stage as stage
              [Sorghum].AboveGroundLive.Wt as biomass
              [Sorghum].Root.Live.Wt as root.wt
              [Sorghum].Stem.Live.Wt as stem.wt
              [Sorghum].Rachis.Live.Wt as rachis.wt
              [Sorghum].Grain.Live.Wt as yield
              [Sorghum].Summariser.AboveGroundLive.N as tops.wt
              [Root].Live.wt
              [Leaf].Live.wt
              [Stem].Live.wt
              [Husk].Live.wt
              [Rachis].Live.wt
              [Grain].Live.wt
              [Sorghum].Root.Live.N as root.n
              [Sorghum].Stem.Live.N as stem.n
              [Sorghum].Rachis.Live.N as rachis.n
              [Sorghum].Grain.Live.N as grain.n
              [Sorghum].Grain.Live.NConc as nconc
              [Sorghum].Grain.NumberFunction.Value as grainno
              [Sorghum].Grain.Size as grainsize
              [Sorghum].Structure.MainStemNodeNo as leafno
              [Sorghum].Phenology.LeafAppearance1.RemainingLeaves.Value
              [Sorghum].Phenology.LeafAppearance2.RemainingLeaves.Value
              [Sorghum].Phenology.LeafAppearance1._RemainingLeaves
              [Sorghum].Phenology.LeafAppearance2._RemainingLeaves
              [Soil].SoilWater.ESW as esw
              [Sorghum].Phenology.Juvenile.Target.Value
              sum([Soil].SoilNitrogen.NO3) as no3
              sum([Soil].SoilWater.SW) as sw
              [Sorghum].WaterSupplyDemandRatio as sdratio
              [Sorghum].Leaf.Photosynthesis.FW.Value as ruestress
              [Phenology].Germinating.Target.Value
              [Phenology].Emerging.Target.Value
              [Phenology].Juvenile.Target.Value
              [Phenology].JuvenileToFloralInit.Target.Value
              [Phenology].FloralInitToFlagLeaf.Target.Value
              [Phenology].FlagLeafToFlowering.Target.Value
              [Phenology].FloweringToGrainFilling.Target.Value
              [Phenology].GrainFilling.Target.Value
              [Phenology].Maturing.Target.Value
              [Phenology].MaturityToHarvestRipe.Target.Value
              [Phenology].TTFromEmergence.Value
              [Leaf].TPLA.Value
              [Leaf].TPLA2.Value
              [Leaf].TPLAMax.Value
              [Leaf].TPLAToday.Value
              [Leaf].Exponent.Value
              [Leaf].TPLAInflection.Value
              [Leaf].LAI
              [Phenology].TTEmergToFlagLeaf.Value
              [Structure].MainStemFinalNodeNumber.Value
              [Structure].MainStemNodeNo
              [Leaf].CoverGreen
              [Leaf].RadIntTot
              [Weather].Radn
              [Leaf].WaterDemand
              [Arbitrator].DMSupply
              [Arbitrator].DM.TotalFixationSupply
              [Grain].FinalGrainNum.Value
              [Leaf].LeafPartitioningCoefficient.Value
              [Leaf].DMDemandFunction.Value
              [Stem].DMDemandFunction.Value
              [Rachis].DMDemandFunction.Value
              [Grain].DMDemandFunction.Value
              [Leaf].DMRemaining.Value
              [Grain].PotGrainFillRate.Value
            EventNames:
              [Clock].DoReport
          Operations operationsNWater
            1997-01-09  [Irrigation].Apply(52);
            1997-01-16  [Irrigation].Apply(36);
            1997-01-21  [Irrigation].Apply(18);
            1997-01-29  [Irrigation].Apply(20);
            1997-02-07  [Irrigation].Apply(14);
            1997-03-13  [Irrigation].Apply(30);
            1997-03-21  [Irrigation].Apply(45);
            1997-04-10  [Irrigation].Apply(27);
            1997-04-17  [Irrigation].Apply(42);
            1997-05-02  [Irrigation].Apply(27);
            1996-12-23  [Fertiliser].Apply(152, Fertiliser.Types.NO3N, 50);
            1997-02-12  [Fertiliser].Apply(59, Fertiliser.Types.NO3N, 50);
            1997-03-21  [Fertiliser].Apply(59, Fertiliser.Types.NO3N, 50);
    Experiment HE2
      Memo
        This trial was conducted at Hermitage Research Station in early 1997, and is linked with HE1, HE3 and HE4.  It consisted of 3 Genotypes: Buster, an Australian commercial line, M35-1, an Indian Rabi season landrace, and QL41/QL36, an Australian sorghum check for ... It was grown under non-limiting water conditions, with a limited nitrogen. Yields were around 2 -3 t/ha for the Australian hybrids and 0.7 t/ha for the Indian landrace.
      Factors
        Factor Genotype
          Factor Buster: Specifications=[operations]
            Operations
              1997-01-09  [Sorghum].Sow(population:10, cultivar:"Buster", depth:10, rowSpacing:500);
      Simulation HE2: Area=0; Slope=0
        Clock: StartDate=1996-12-01; EndDate=1997-06-30
        Summary summaryfile
        Weather: FileName=HE2.met
        SoilArbitrator Soil Arbitrator
        Zone paddock: Area=1; Slope=0
          Operations
            1997-01-09  [Sorghum].Sow(population:10, cultivar:"Buster", depth:30, rowSpacing:500);
          Soil HRS: SoilType=HMM; Site=HRS; NearestTown=Unknown; Region=SE Queensland; NaturalVegetation=Unknown; Latitude=0; Longitude=0; Area=0
            Water: same as Experiments.HE1.HE1.paddock.HRS.Water
            SoilWater: same as Experiments.HE1.HE1.paddock.HRS.SoilWater
            SoilNitrogen: fom_type=[default, manure, mucuna, lablab, shemp, stable]; fract_carb=[0.2, 0.3, 0.54, 0.57, 0.45, 0]; fract_cell=[0.7, 0.3, 0.37, 0.37, 0.47, 0.1]; fract_lign=[0.1, 0.4, 0.09, 0.06, 0.08, 0.9]; wfpsN2N2O_x=[22, 88]; wfpsN2N2O_y=[0.1, 1]
            SoilOrganicMatter: same as Experiments.HE1.HE1.paddock.HRS.SoilOrganicMatter
            Analysis: Thickness=[100, 100, 200, 200, 200, 200, 200, 200, 200, 200]; PH=[6.3, 6.4, 6.5, 6.6, 6.6, 6.5, 6.5, 6.5, 6.5, 6.5]; PHUnits=Water; BoronUnits=HotWater
            Sample Initial Water: Thickness=[100, 100, 200, 200, 200, 200, 200, 200, 200, 200]; NO3Units=ppm; NH4Units=ppm; SWUnits=Volumetric; OCUnits=Total; PHUnits=Water
              SW=[0.235, 0.252, 0.27, 0.3, 0.268, 0.304, 0.335, 0.33, 0.32, 0.33]
            Sample Initial Nitrogen: NO3Units=kgha; NH4Units=ppm; SWUnits=Volumetric; OCUnits=Total; PHUnits=Water
              Thickness  NO3    NH4  PH
              100        0.1    0.1  7
              100        0.026  0.1  7
              200        0.05   0.1  7
              200        0.058  0.1  7
              200        0.394  0.1  7
              200        0.187  0.1  7
              200        0.512  0.1  7
              200        0.762  0.1  7
              200        0.719  0.1  7
              200        0.7    0.1  7
          Plant Sorghum: CropType=Sorghum
          SurfaceOrganicMatter: same as Experiments.HE1.HE1.paddock.SurfaceOrganicMatter
          MicroClimate: same as Experiments.HE1.HE1.paddock.MicroClimate
          Fertiliser
          Irrigation
          Report
            VariableNames:
              [Clock].Today
              [Clock].Today.Year as year
              [Clock].Today.DayOfYear as doy
              [Clock].Today.Date as date
              [Phenology].ThermalTime.Value as TT
              [SorghumSowingRule].Script.DaysAfterSowing as das
              [Sorghum].Phenology.Stage as stage
              [Sorghum].AboveGroundLive.Wt as biomass
              [Sorghum].Root.Live.Wt as root.wt
              [Sorghum].Stem.Live.Wt as stem.wt
              [Sorghum].Rachis.Live.Wt as rachis.wt
              [Sorghum].Grain.Live.Wt as yield
              [Sorghum].Summariser.AboveGroundLive.N as tops.wt
              [Sorghum].Root.Live.N as root.n
              [Sorghum].Stem.Live.N as stem.n
              [Sorghum].Rachis.Live.N as rachis.n
              [Sorghum].Grain.Live.N as grain.n
              [Sorghum].Grain.Live.NConc as nconc
              [Sorghum].Grain.NumberFunction.Value as grainno
              [Sorghum].Grain.Size as grainsize
              [Sorghum].Structure.MainStemNodeNo as leafno
              [Sorghum].Phenology.LeafAppearance1.RemainingLeaves.Value
              [Sorghum].Phenology.LeafAppearance2.RemainingLeaves.Value
              [Sorghum].Phenology.LeafAppearance1._RemainingLeaves
              [Sorghum].Phenology.LeafAppearance2._RemainingLeaves
              [Soil].SoilWater.ESW as esw
              [Sorghum].Phenology.Juvenile.Target.Value
              sum([Soil].SoilNitrogen.NO3) as no3
              sum([Soil].SoilWater.SW) as sw
              [Sorghum].WaterSupplyDemandRatio as sdratio
              [Sorghum].Leaf.Photosynthesis.FW.Value as ruestress
              [Phenology].Germinating.Target.Value
              [Phenology].Emerging.Target.Value
              [Phenology].Juvenile.Target.Value
              [Phenology].JuvenileToFloralInit.Target.Value
              [Phenology].FloralInitToFlagLeaf.Target.Value
              [Phenology].FlagLeafToFlowering.Target.Value
              [Phenology].FloweringToGrainFilling.Target.Value
              [Phenology].GrainFilling.Target.Value
              [Phenology].Maturing.Target.Value
              [Phenology].MaturityToHarvestRipe.Target.Value
              [Phenology].TTFromEmergence.Value
              [Leaf].TPLA.Value
              [Leaf].TPLA2.Value
              [Leaf].TPLAMax.Value
              [Leaf].TPLAToday.Value
              [Leaf].Exponent.Value
              [Leaf].TPLAInflection.Value
              [Leaf].LAI
              [Phenology].TTEmergToFlagLeaf.Value
              [Structure].MainStemFinalNodeNumber.Value
              [Structure].MainStemNodeNo
              [Leaf].CoverGreen
              [Leaf].RadIntTot
              [Weather].Radn
              [Leaf].WaterDemand
              [Arbitrator].DMSupply
              [Arbitrator].DM.TotalFixationSupply
              [Leaf].Live.wt
              [Stem].Live.wt
              [Husk].Live.wt
              [Rachis].Live.wt
              [Grain].Live.wt
              [Grain].FinalGrainNum.Value
              [Leaf].LeafPartitioningCoefficient.Value
              [Leaf].DMDemandFunction.Value
              [Stem].DMDemandFunction.Value
              [Rachis].DMDemandFunction.Value
              [Grain].DMDemandFunction.Value
              [Leaf].DMRemaining.Value
              [Grain].PotGrainFillRate.Value
            EventNames:
              [Clock].DoReport
          Operations operationsNWater
            1997-01-09  [Irrigation].Apply(52);
            1997-01-16  [Irrigation].Apply(36);
            1997-01-21  [Irrigation].Apply(18);
            1997-01-29  [Irrigation].Apply(20);
            1997-02-07  [Irrigation].Apply(14);
            1997-03-13  [Irrigation].Apply(30);
            1997-03-21  [Irrigation].Apply(45);
            1997-04-10  [Irrigation].Apply(27);
            1997-04-17  [Irrigation].Apply(42);
            1997-05-02  [Irrigation].Apply(27);
            1996-12-23  [Fertiliser].Apply(10, Fertiliser.Types.NO3N, 50);
    Experiment HE3
      Memo
        This trial was conducted at Hermitage Research Station in early 1997, and is linked with HE1, HE2 and HE4.  It consisted of 3 Genotypes: Buster, an Australian commercial line, M35-1, an Indian Rabi season landrace, and QL41/QL36, an Australian sorghum check for ... It was grown under the Rain out shelter, and so started with a full profile of 200 mm of water, and after an irrigation of 19 mm 22 days after sowing to assist secondary root establishment, it received no further water. Nitrogen was applied prior to sowing and irrigated so as to distribute it down the profile, to provide non-limiting nitrogen conditions. Yields were around 1 to 2 t/ha for the Australian hybrids and the Indian landrace failed to produce grain.
      Factors: same as Experiments.HE2.Factors
      Simulation HE3: Area=0; Slope=0
        Clock: StartDate=1996-12-01; EndDate=1997-06-30
        Summary summaryfile
        Weather: FileName=HE3.met
        SoilArbitrator Soil Arbitrator
        Zone paddock: Area=1; Slope=0
          Operations
            1997-01-09  [Sorghum].Sow(population:10, cultivar:"Buster", depth:30, rowSpacing:500);
          Soil HRS: same as Experiments.HE2.HE2.paddock.HRS
          Plant Sorghum: CropType=Sorghum
          SurfaceOrganicMatter: same as Experiments.HE1.HE1.paddock.SurfaceOrganicMatter
          MicroClimate: same as Experiments.HE1.HE1.paddock.MicroClimate
          Fertiliser
          Irrigation
          Report: same as Experiments.HE2.HE2.paddock.Report
          Operations operationsNWater
            1996-12-23  [Irrigation].Apply(69);
            1996-12-27  [Irrigation].Apply(9);
            1997-01-09  [Irrigation].Apply(33);
            1997-01-16  [Irrigation].Apply(28);
            1997-01-31  [Irrigation].Apply(19);
            1996-12-23  [Fertiliser].Apply(120, Fertiliser.Types.NO3N, 50);
    Experiment HE4
      Memo
        This trial was conducted at Hermitage Research Station in early 1997, and is linked with HE1, HE2 and HE3.  It consisted of 3 Genotypes: Buster, an Australian commercial line, M35-1, an Indian Rabi season landrace, and QL41/QL36, an Australian sorghum check for ... It was grown under the Rain out shelter, and so started with a full profile of 200 mm of water, and after an irrigation of 19 mm 22 days after sowing to assist secondary root establishment, it received no further water. Nitrogen was also limited, so as to induce water and nitrogen stress. Yields were around 1.5 to 2.3 t/ha for the Australian hybrids and 0.02 t/ha for the Indian landrace.
      Factors: same as Experiments.HE2.Factors
      Simulation HE4: Area=0; Slope=0
        Clock: StartDate=1996-12-01; EndDate=1997-06-30
        Summary summaryfile
        Weather: FileName=HE4.met
        SoilArbitrator Soil Arbitrator
        Zone paddock: Area=1; Slope=0
          Operations
            1997-01-09  [Sorghum].Sow(population:10, cultivar:"Buster", depth:30, rowSpacing:500);
          Soil HRS: SoilType=HMM; Site=HRS; NearestTown=Unknown; Region=SE Queensland; NaturalVegetation=Unknown; Latitude=0; Longitude=0; Area=0
            Water: same as Experiments.HE1.HE1.paddock.HRS.Water
            SoilWater: same as Experiments.HE1.HE1.paddock.HRS.SoilWater
            SoilNitrogen: fom_type=[default, manure, mucuna, lablab, shemp, stable]; fract_carb=[0.2, 0.3, 0.54, 0.57, 0.45, 0]; fract_cell=[0.7, 0.3, 0.37, 0.37, 0.47, 0.1]; fract_lign=[0.1, 0.4, 0.09, 0.06, 0.08, 0.9]; wfpsN2N2O_x=[22, 88]; wfpsN2N2O_y=[0.1, 1]
            SoilOrganicMatter: same as Experiments.HE1.HE1.paddock.HRS.SoilOrganicMatter
            Analysis: Thickness=[100, 100, 200, 200, 200, 200, 200, 200, 200, 200]; PH=[6.3, 6.4, 6.5, 6.6, 6.6, 6.5, 6.5, 6.5, 6.5, 6.5]; PHUnits=Water; BoronUnits=HotWater
            Sample Initial Water: Thickness=[100, 100, 200, 200, 200, 200, 200, 200, 200, 200]; NO3Units=ppm; NH4Units=ppm; SWUnits=Volumetric; OCUnits=Total; PHUnits=Water
              SW=[0.235, 0.252, 0.27, 0.3, 0.268, 0.304, 0.335, 0.33, 0.32, 0.33]
            Sample Initial Nitrogen: NO3Units=kgha; NH4Units=ppm; SWUnits=Volumetric; OCUnits=Total; PHUnits=Water
              Thickness  NO3     NH4  PH
              100        18.461  0.1  7
              100        2.899   0.1  7
              200        2.189   0.1  7
              200        1.598   0.1  7
              200        1.953   0.1  7
              200        2.604   0.1  7
              200        6.449   0.1  7
              200        10.059  0.1  7
              200        10.295  0.1  7
              200        12.899  0.1  7
          Plant Sorghum: CropType=Sorghum
          SurfaceOrganicMatter: same as Experiments.HE1.HE1.paddock.SurfaceOrganicMatter
          MicroClimate: same as Experiments.HE1.HE1.paddock.MicroClimate
          Fertiliser
          Irrigation
          Report: same as Experiments.HE2.HE2.paddock.Report
          Operations operationsNWater
            1996-12-23  [Irrigation].Apply(69);
            1996-12-27  [Irrigation].Apply(9);
            1997-01-09  [Irrigation].Apply(33);
            1997-01-16  [Irrigation].Apply(28);
            1997-01-31  [Irrigation].Apply(19);
            1996-12-23  [Fertiliser].Apply(10, Fertiliser.Types.NO3N, 50);
    Experiment HE5
      Memo
        This trial was conducted at Hermitage Research Station in late 1997, and is linked with HE6, HE7 and HE8.  It consisted of 3 Genotypes: Buster, an Australian commercial line, M35-1, an Indian Rabi season landrace, and CSH13R, a single dwarf Indian hybrid. It was grown under non-limiting water and nitrogen conditions. Yields were around 8 - 8.6 t/ha for the hybrids and 5.3 t/ha for the landrace.
      Factors
        Factor Genotype
          Factor Buster: Specifications=[operations]
            Operations
              1997-11-27  [Sorghum].Sow(population:10, cultivar:"Buster", depth:30, rowSpacing:500);
      Simulation HE5: Area=0; Slope=0
        Clock: StartDate=1997-11-18; EndDate=1998-04-15
        Summary summaryfile
        Weather: FileName=HE5.met
        SoilArbitrator Soil Arbitrator
        Zone paddock: Area=1; Slope=0
          Operations
            1997-11-27  [Sorghum].Sow(population:10, cultivar:"Buster", depth:30, rowSpacing:500);
          Soil HRS: SoilType=HMM; Site=HRS; NearestTown=Unknown; Region=SE Queensland; NaturalVegetation=Unknown; Latitude=0; Longitude=0; Area=0
            Water: same as Experiments.HE1.HE1.paddock.HRS.Water
            SoilWater: same as Experiments.HE1.HE1.paddock.HRS.SoilWater
            SoilNitrogen: fom_type=[default, manure, mucuna, lablab, shemp, stable]; fract_carb=[0.2, 0.3, 0.54, 0.57, 0.45, 0]; fract_cell=[0.7, 0.3, 0.37, 0.37, 0.47, 0.1]; fract_lign=[0.1, 0.4, 0.09, 0.06, 0.08, 0.9]; wfpsN2N2O_x=[22, 88]; wfpsN2N2O_y=[0.1, 1]
            SoilOrganicMatter: same as Experiments.HE1.HE1.paddock.HRS.SoilOrganicMatter
            Analysis: Thickness=[100, 100, 200, 200, 200, 200, 200, 200, 200, 200]; PH=[6.3, 6.4, 6.5, 6.6, 6.6, 6.5, 6.5, 6.5, 6.5, 6.5]; PHUnits=Water; BoronUnits=HotWater
            Sample Initial Water: Thickness=[100, 100, 200, 200, 200, 200, 200, 200, 200, 200]; NO3Units=ppm; NH4Units=ppm; SWUnits=Volumetric; OCUnits=Total; PHUnits=Water
              SW=[0.217, 0.357, 0.375, 0.401, 0.349, 0.351, 0.359, 0.33, 0.322, 0.347]
            Sample Initial Nitrogen: NO3Units=ppm; NH4Units=ppm; SWUnits=Volumetric; OCUnits=Total; PHUnits=Water
              Thickness  NO3     NH4  PH
              100        8.421   0.1  7
              100        8.054   0.1  7
              200        7.001   0.1  7
              200        3.824   0.1  7
              200        2.759   0.1  7
              200        3.429   0.1  7
              200        8.668   0.1  7
              200        11.576  0.1  7
              200        8.816   0.1  7
              200        11.758  0.1  7
          Plant Sorghum: CropType=Sorghum
          SurfaceOrganicMatter: same as Experiments.HE1.HE1.paddock.SurfaceOrganicMatter
          MicroClimate: same as Experiments.HE1.HE1.paddock.MicroClimate
          Fertiliser
          Irrigation
          Report: same as Experiments.HE2.HE2.paddock.Report
          Operations operationsNWater
            1997-11-28  [Irrigation].Apply(16);
            1997-12-02  [Irrigation].Apply(25);
            1997-12-04  [Irrigation].Apply(13);
            1997-12-08  [Irrigation].Apply(21);
            1997-12-18  [Irrigation].Apply(28);
            1998-01-06  [Irrigation].Apply(26);
            1998-01-12  [Irrigation].Apply(46);
            1998-01-27  [Irrigation].Apply(25);
            1998-02-20  [Irrigation].Apply(26);
            1998-02-27  [Irrigation].Apply(55);
            1998-03-13  [Irrigation].Apply(22);
            1998-03-18  [Irrigation].Apply(39);
            1998-03-20  [Irrigation].Apply(21);
            1997-11-26  [Fertiliser].Apply(120, Fertiliser.Types.NO3N, 50);
            1998-01-06  [Fertiliser].Apply(59, Fertiliser.Types.NO3N, 50);
            1998-02-20  [Fertiliser].Apply(59, Fertiliser.Types.NO3N, 50);
    Experiment HE6
      Memo
        This trial was conducted at Hermitage Research Station in late 1997, and is linked with HE5, HE7 and HE8.  It consisted of 3 Genotypes: Buster, an Australian commercial line, M35-1, an Indian Rabi season landrace,  and CSH13R, a single dwarf Indian hybrid. It was grown under non-limiting water conditions, with a limited nitrogen. Yields were around 3.5 to 4 t/ha for the hybrids and 2.5 t/ha for the landrace.
      Factors: same as Experiments.HE5.Factors
      Simulation HE6: Area=0; Slope=0
        Clock: StartDate=1997-11-18; EndDate=1998-04-15
        Summary summaryfile
        Weather: FileName=HE6.met
        SoilArbitrator Soil Arbitrator
        Zone paddock: Area=1; Slope=0
          Operations
            1997-11-27  [Sorghum].Sow(population:10, cultivar:"Buster", depth:30, rowSpacing:500);
          Soil HRS: SoilType=HMM; Site=HRS; NearestTown=Unknown; Region=SE Queensland; NaturalVegetation=Unknown; Latitude=0; Longitude=0; Area=0
            Water: same as Experiments.HE1.HE1.paddock.HRS.Water
            SoilWater: same as Experiments.HE1.HE1.paddock.HRS.SoilWater
            SoilNitrogen: fom_type=[default, manure, mucuna, lablab, shemp, stable]; fract_carb=[0.2, 0.3, 0.54, 0.57, 0.45, 0]; fract_cell=[0.7, 0.3, 0.37, 0.37, 0.47, 0.1]; fract_lign=[0.1, 0.4, 0.09, 0.06, 0.08, 0.9]; wfpsN2N2O_x=[22, 88]; wfpsN2N2O_y=[0.1, 1]
            SoilOrganicMatter: same as Experiments.HE1.HE1.paddock.HRS.SoilOrganicMatter
            Analysis: Thickness=[100, 100, 200, 200, 200, 200, 200, 200, 200, 200]; PH=[6.3, 6.4, 6.5, 6.6, 6.6, 6.5, 6.5, 6.5, 6.5, 6.5]; PHUnits=Water; BoronUnits=HotWater
            Sample Initial Water: Thickness=[100, 100, 200, 200, 200, 200, 200, 200, 200, 200]; NO3Units=ppm; NH4Units=ppm; SWUnits=Volumetric; OCUnits=Total; PHUnits=Water
              SW=[217, 0.357, 0.375, 0.401, 0.349, 0.351, 0.359, 0.33, 0.322, 0.347]
            Sample Initial Nitrogen: NO3Units=ppm; NH4Units=ppm; SWUnits=Volumetric; OCUnits=Total; PHUnits=Water
              Thickness  NO3    NH4  PH
              100        1.493  0.1  7
              100        1.633  0.1  7
              200        1.233  0.1  7
              200        0.9    0.1  7
              200        1.1    0.1  7
              200        1.467  0.1  7
              200        2.516  0.1  7
              200        3.067  0.1  7
              200        3.012  0.1  7
              200        2.976  0.1  7
          Plant Sorghum: CropType=Sorghum
          SurfaceOrganicMatter: same as Experiments.HE1.HE1.paddock.SurfaceOrganicMatter
          MicroClimate: same as Experiments.HE1.HE1.paddock.MicroClimate
          Fertiliser
          Irrigation
          Report: same as Experiments.HE2.HE2.paddock.Report
          Operations operationsNWater
            1997-11-28  [Irrigation].Apply(16);
            1997-12-02  [Irrigation].Apply(25);
            1997-12-04  [Irrigation].Apply(13);
            1997-12-08  [Irrigation].Apply(21);
            1997-12-18  [Irrigation].Apply(28);
            1998-01-06  [Irrigation].Apply(26);
            1998-01-12  [Irrigation].Apply(46);
            1998-01-27  [Irrigation].Apply(25);
            1998-02-20  [Irrigation].Apply(26);
            1998-02-27  [Irrigation].Apply(55);
            1998-03-13  [Irrigation].Apply(22);
            1998-03-18  [Irrigation].Apply(39);
            1998-03-20  [Irrigation].Apply(21);
            1997-11-26  [Fertiliser].Apply(10, Fertiliser.Types.NO3N, 50);
    Experiment HE7
      Memo
        This trial was conducted at Hermitage Research Station in late 1997, and is linked with HE5, HE6 and HE8.  It consisted of 3 Genotypes: Buster, an Australian commercial line, M35-1, an Indian Rabi season landrace, and CSH13R, a single dwarf Indian hybrid. It was grown under the Rain out shelter, and after an irrigation of 90 mm 19 days after sowing to assist secondary root establishment and fill the profile, it received no further water. Nitrogen was applied prior to sowing and irrigated so as to distribute it down the profile, to provide non-limiting nitrogen conditions. Yields were around 2 t/ha for Buster, the triple dwarf hybrid, and the single dwarf hybrid and landrace failed to produce grain.
      Factors: same as Experiments.HE5.Factors
      Simulation HE7: Area=0; Slope=0
        Clock: StartDate=1997-11-18; EndDate=1998-04-15
        Summary summaryfile
        Weather: FileName=HE7.met
        SoilArbitrator Soil Arbitrator
        Zone paddock: Area=1; Slope=0
          Operations
            1997-11-27  [Sorghum].Sow(population:10, cultivar:"Buster", depth:30, rowSpacing:500);
          Soil HRS: SoilType=HMM; Site=HRS; NearestTown=Unknown; Region=SE Queensland; NaturalVegetation=Unknown; Latitude=0; Longitude=0; Area=0
            Water: same as Experiments.HE1.HE1.paddock.HRS.Water
            SoilWater: same as Experiments.HE1.HE1.paddock.HRS.SoilWater
            SoilNitrogen: fom_type=[default, manure, mucuna, lablab, shemp, stable]; fract_carb=[0.2, 0.3, 0.54, 0.57, 0.45, 0]; fract_cell=[0.7, 0.3, 0.37, 0.37, 0.47, 0.1]; fract_lign=[0.1, 0.4, 0.09, 0.06, 0.08, 0.9]; wfpsN2N2O_x=[22, 88]; wfpsN2N2O_y=[0.1, 1]
            SoilOrganicMatter: same as Experiments.HE1.HE1.paddock.HRS.SoilOrganicMatter
            Analysis: Thickness=[100, 100, 200, 200, 200, 200, 200, 200, 200, 200]; PH=[6.3, 6.4, 6.5, 6.6, 6.6, 6.5, 6.5, 6.5, 6.5, 6.5]; PHUnits=Water; BoronUnits=HotWater
            Sample Initial Water: Thickness=[100, 100, 200, 200, 200, 200, 200, 200, 200, 200]; NO3Units=ppm; NH4Units=ppm; SWUnits=Volumetric; OCUnits=Total; PHUnits=Water
              SW=[0.307, 0.326, 0.444, 0.429, 0.363, 0.351, 0.336, 0.343, 0.352, 0.347]
            Sample Initial Nitrogen: NO3Units=ppm; NH4Units=ppm; SWUnits=Volumetric; OCUnits=Total; PHUnits=Water
              Thickness  NO3     NH4  PH
              100        25.798  0.1  7
              100        6.921   0.1  7
              200        9.285   0.1  7
              200        2.823   0.1  7
              200        2.286   0.1  7
              200        3.196   0.1  7
              200        8.668   0.1  7
              200        4.41    0.1  7
              200        2.743   0.1  7
              200        4.891   0.1  7
          Plant Sorghum: CropType=Sorghum
          SurfaceOrganicMatter: same as Experiments.HE1.HE1.paddock.SurfaceOrganicMatter
          MicroClimate: same as Experiments.HE1.HE1.paddock.MicroClimate
          Fertiliser
          Irrigation
          Report: same as Experiments.HE2.HE2.paddock.Report
          Operations operationsNWater
            1997-11-28  [Irrigation].Apply(65);
            1997-12-16  [Irrigation].Apply(90);
            1997-11-26  [Fertiliser].Apply(120, Fertiliser.Types.NO3N, 50);
    Experiment HE8
      Memo
        This trial was conducted at Hermitage Research Station in late 1997, and is linked with HE5, HE6 and HE7.  It consisted of 3 Genotypes: Buster, an Australian commercial line, M35-1, an Indian Rabi season landrace, and CSH13R, a single dwarf Indian hybrid. It was grown under the Rain out shelter,and after an irrigation of 90 mm 19 days after sowing to assist secondary root establishment and fill the profile, it received no further water. Nitrogen was also limited, so as to induce water and nitrogen stress. Yields were around 1.4 t/ha for Buster, the triple dwarf hybrid, and the single dwarf hybrid and landrace failed to produce grain.
      Factors: same as Experiments.HE5.Factors
      Simulation HE8: Area=0; Slope=0
        Clock: StartDate=1997-11-18; EndDate=1998-04-15
        Summary summaryfile
        Weather: FileName=HE8.met
        SoilArbitrator Soil Arbitrator
        Zone paddock: Area=1; Slope=0
          Operations
            1997-11-27  [Sorghum].Sow(population:10, cultivar:"Buster", depth:30, rowSpacing:500);
          Soil HRS: SoilType=HMM; Site=HRS; NearestTown=Unknown; Region=SE Queensland; NaturalVegetation=Unknown; Latitude=0; Longitude=0; Area=0
            Water: same as Experiments.HE1.HE1.paddock.HRS.Water
            SoilWater: same as Experiments.HE1.HE1.paddock.HRS.SoilWater
            SoilNitrogen: fom_type=[default, manure, mucuna, lablab, shemp, stable]; fract_carb=[0.2, 0.3, 0.54, 0.57, 0.45, 0]; fract_cell=[0.7, 0.3, 0.37, 0.37, 0.47, 0.1]; fract_lign=[0.1, 0.4, 0.09, 0.06, 0.08, 0.9]; wfpsN2N2O_x=[22, 88]; wfpsN2N2O_y=[0.1, 1]
            SoilOrganicMatter: same as Experiments.HE1.HE1.paddock.HRS.SoilOrganicMatter
            Analysis: Thickness=[100, 100, 200, 200, 200, 200, 200, 200, 200, 200]; PH=[6.3, 6.4, 6.5, 6.6, 6.6, 6.5, 6.5, 6.5, 6.5, 6.5]; PHUnits=Water; BoronUnits=HotWater
            Sample Initial Water: Thickness=[100, 100, 200, 200, 200, 200, 200, 200, 200, 200]; NO3Units=ppm; NH4Units=ppm; SWUnits=Volumetric; OCUnits=Total; PHUnits=Water
              SW=[0.294, 0.381, 0.367, 0.306, 0.29, 0.319, 0.33, 0.343, 0.337, 0.344]
            Sample Initial Nitrogen: NO3Units=ppm; NH4Units=ppm; SWUnits=Volumetric; OCUnits=Total; PHUnits=Water
              Thickness  NO3    NH4  PH
              100        9.83   0.1  7
              100        1.83   0.1  7
              200        1      0.1  7
              200        1.41   0.1  7
              200        4.16   0.1  7
              200        10.57  0.1  7
              200        16.75  0.1  7
              200        16.67  0.1  7
              200        12.6   0.1  7
              200        9.27   0.1  7
          Plant Sorghum: CropType=Sorghum
          SurfaceOrganicMatter: same as Experiments.HE1.HE1.paddock.SurfaceOrganicMatter
          MicroClimate: same as Experiments.HE1.HE1.paddock.MicroClimate
          Fertiliser
          Irrigation
          Report: same as Experiments.HE2.HE2.paddock.Report
          Operations operationsNWater
            1997-11-28  [Irrigation].Apply(65);
            1997-12-16  [Irrigation].Apply(90);
            1997-11-26  [Fertiliser].Apply(10, Fertiliser.Types.NO3N, 50);
    Experiment LE13
      Memo
        This trial was conducted at Gatton in late 1995. It consisted of 2 Genotypes: Buster, an Australian commercial line, and M35-1, an Indian Rabi season landrace. There were 2 Water treatments (non-limiting and rainfed), and 2 nitrogen treatments on the rainfed (0,240). The non-limiting water treatment had no o nitrogrn treatment, it had 240 kg N/ha. Yields ranged from 5.6 t/ha to 8.8 t/ha for the hybrid and 1.9 t/ha to 3.2 t/ha for the landrace.
      Factors
        Factor Genotype
          Factor Buster: Specifications=[operations]
            Operations
              1995-11-29  [Sorghum].Sow(population:16, cultivar:"Buster", depth:20, rowSpacing:500);
        Factor NWater
          Factor 240Irrigated: Specifications=[operationsNWater]
            Operations operationsNWater
              1995-11-29  [Irrigation].Apply(14);
              1995-12-01  [Irrigation].Apply(10);
              1995-12-03  [Irrigation].Apply(13);
              1995-12-05  [Irrigation].Apply(8);
              1996-02-07  [Irrigation].Apply(6);
              1996-02-12  [Irrigation].Apply(33);
              1996-02-26  [Irrigation].Apply(20);
              1996-03-06  [Irrigation].Apply(18);
              1996-03-18  [Irrigation].Apply(25);
              1995-11-28  [Fertiliser].Apply(122, Fertiliser.Types.NO3N, 50);
              1995-12-28  [Fertiliser].Apply(59, Fertiliser.Types.NO3N, 50);
              1996-02-07  [Fertiliser].Apply(59, Fertiliser.Types.NO3N, 50);
          Factor 240Dryland: Specifications=[operationsNWater]
            Operations operationsNWater
              1995-11-29  [Irrigation].Apply(14);
              1995-12-01  [Irrigation].Apply(10);
              1995-12-03  [Irrigation].Apply(13);
              1995-12-05  [Irrigation].Apply(8);
              1996-02-07  [Irrigation].Apply(6);
              1995-11-28  [Fertiliser].Apply(122, Fertiliser.Types.NO3N, 50);
              1995-12-28  [Fertiliser].Apply(59, Fertiliser.Types.NO3N, 50);
              1996-02-07  [Fertiliser].Apply(59, Fertiliser.Types.NO3N, 50);
          Factor 10Dryland: Specifications=[operationsNWater]
            Operations operationsWater
              1995-11-29  [Irrigation].Apply(14);
              1995-12-01  [Irrigation].Apply(10);
              1995-12-03  [Irrigation].Apply(13);
              1995-12-05  [Irrigation].Apply(8);
              1996-02-07  [Irrigation].Apply(6);
              1995-11-28  [Fertiliser].Apply(12, Fertiliser.Types.NO3N, 50);
      Simulation LE13: Area=0; Slope=0
        Clock: StartDate=1995-11-28; EndDate=1996-05-01
        Summary summaryfile
        Weather: FileName=LE13.met
        SoilArbitrator Soil Arbitrator
        Zone paddock: Area=1; Slope=0
          Operations
            1995-11-29  [Sorghum].Sow(population:16, cultivar:"Buster", depth:20, rowSpacing:500);
          Soil GLHField: SoilType=GLHSoil; LocalName=Cooper Lab; Site=Cooper Lab; NearestTown=Gatton; Region=SE Queensland; NaturalVegetation=Unknown; Latitude=0; Longitude=0; Area=0
            Water
              Thickness  BD    AirDry  LL15  DUL   SAT
              200        1.32  0.1     0.3   0.41  0.46
              200        1.3   0.15    0.3   0.43  0.48
              200        1.23  0.28    0.35  0.46  0.51
              300        1.27  0.28    0.32  0.44  0.49
              300        1.37  0.28    0.29  0.4   0.45
              300        1.35  0.3     0.31  0.41  0.46
              300        1.35  0.3     0.31  0.38  0.43
              SoilCrop SorghumSoil: LL=[0.3, 0.3, 0.35, 0.32, 0.29, 0.31, 0.31]; KL=[0.08, 0.08, 0.08, 0.08, 0.06, 0.04, 0.02]; XF=[1, 1, 1, 1, 1, 1, 1]
            SoilWater: SummerDate=1-Nov; SummerU=6; SummerCona=6.5; WinterDate=1-Apr; WinterU=6; WinterCona=3.5; DiffusConst=88; DiffusSlope=35.4; Salb=0.2; CN2Bare=91; CNRed=20; CNCov=0.8; max_pond=0; Thickness=[200, 200, 200, 300, 300, 300, 300]; SWCON=[0.5, 0.5, 0.5, 0.5, 0.5, 0.5, 0.5]; residueinterception=0
            SoilNitrogen: fom_type=[default, manure, mucuna, lablab, shemp, stable]; fract_carb=[0.2, 0.3, 0.54, 0.57, 0.45, 0]; fract_cell=[0.7, 0.3, 0.37, 0.37, 0.47, 0.1]; fract_lign=[0.1, 0.4, 0.09, 0.06, 0.08, 0.9]; wfpsN2N2O_x=[22, 88]; wfpsN2N2O_y=[0.1, 1]
            SoilOrganicMatter: RootCN=30; RootWt=1500; SoilCN=12.5; EnrACoeff=7.4; EnrBCoeff=0.2; OCUnits=Total
              Thickness  OC    FBiom  FInert
              200        1.3   0.03   0.31
              200        0.65  0.01   0.38
              200        0.32  0      0.47
              300        0.11  0      0.7
              300        0.11  0      0.9
              300        0.11  0      0.95
              300        0.11  0      0.95
            Analysis: Thickness=[200, 200, 200, 300, 300, 300, 300]; PH=[8.2, 8.7, 8.9, 8.1, 8, 8, 8]; PHUnits=Water; BoronUnits=HotWater
            Sample Initial Water: Thickness=[200, 200, 200, 300, 300, 300, 300]; SW=[0.385, 0.47, 0.467, 0.459, 0.394, 0.399, 0.38]; NO3Units=ppm; NH4Units=ppm; SWUnits=Volumetric; OCUnits=Total; PHUnits=Water
            Sample Initial Nitrogen: NO3Units=ppm; NH4Units=ppm; SWUnits=Volumetric; OCUnits=Total; PHUnits=Water
              Thickness  NO3    NH4  PH
              200        9      0.1  8.2
              200        2.48   0.1  8.7
              200        2.79   0.1  8.9
              300        1.28   0.1  8.1
              300        2.98   0.1  8
              300        2.965  0.1  8
              300        1.387  0.1  8
          Plant Sorghum: CropType=Sorghum
          SurfaceOrganicMatter: same as Experiments.HE1.HE1.paddock.SurfaceOrganicMatter
          MicroClimate: same as Experiments.HE1.HE1.paddock.MicroClimate
          Fertiliser
          Irrigation
          Report: same as Experiments.HE2.HE2.paddock.Report
          Operations operationsNWater: same as Experiments.LE13.Factors.NWater.240Irrigated.operationsNWater
    Experiment LE14
      Memo
        This trial was conducted at Gatton in late 1996, and is linked with LE15. It consisted of 3 Genotypes: Buster, an Australian commercial line, M35-1, an Indian Rabi season landrace, and QL41/QL36, an Australian sorghum check for ... It was grown under non-limiting water and nitrogen conditions.  Yields were around 8.7 to 9.5 t/ha for the hybrids and 4.4 t/ha for the landrace.
      Factors
        Factor Genotype
          Factor Buster: Specifications=[operations]
            Operations
              1996-10-11  [Sorghum].Sow(population:10, cultivar:"Buster", depth:20, rowSpacing:500);
      Simulation LE14: Area=0; Slope=0
        Clock: StartDate=1996-09-05; EndDate=1997-02-19
        Summary summaryfile
        Weather: FileName=LE14.met
        SoilArbitrator Soil Arbitrator
        Zone paddock: Area=1; Slope=0
          Operations
            1996-10-11  [Sorghum].Sow(population:10, cultivar:"Buster", depth:20, rowSpacing:500);
          Soil GLHField: SoilType=GLHSoil; LocalName=Cooper Lab; Site=Cooper Lab; NearestTown=Gatton; Region=SE Queensland; NaturalVegetation=Unknown; Latitude=0; Longitude=0; Area=0
            Water: same as Experiments.LE13.LE13.paddock.GLHField.Water
            SoilWater: same as Experiments.LE13.LE13.paddock.GLHField.SoilWater
            SoilNitrogen: fom_type=[default, manure, mucuna, lablab, shemp, stable]; fract_carb=[0.2, 0.3, 0.54, 0.57, 0.45, 0]; fract_cell=[0.7, 0.3, 0.37, 0.37, 0.47, 0.1]; fract_lign=[0.1, 0.4, 0.09, 0.06, 0.08, 0.9]; wfpsN2N2O_x=[22, 88]; wfpsN2N2O_y=[0.1, 1]
            SoilOrganicMatter: same as Experiments.LE13.LE13.paddock.GLHField.SoilOrganicMatter
            Analysis: Thickness=[200, 200, 200, 300, 300, 300, 300]; PH=[8.2, 8.7, 8.9, 8.1, 8, 8, 8]; PHUnits=Water; BoronUnits=HotWater
            Sample Initial Water: Thickness=[200, 200, 200, 300, 300, 300, 300]; SW=[0.385, 0.47, 0.467, 0.459, 0.394, 0.399, 0.38]; NO3Units=ppm; NH4Units=ppm; SWUnits=Volumetric; OCUnits=Total; PHUnits=Water
            Sample Initial Nitrogen: NO3Units=ppm; NH4Units=ppm; SWUnits=Volumetric; OCUnits=Total; PHUnits=Water
              Thickness  NO3   NH4  PH
              200        11.6  0.1  8.2
              200        5.7   0.1  8.7
              200        3     0.1  8.9
              300        1.6   0.1  8.1
              300        1.9   0.1  8
              300        2.2   0.1  8
              300        1.9   0.1  8
          Plant Sorghum: CropType=Sorghum
          SurfaceOrganicMatter: same as Experiments.HE1.HE1.paddock.SurfaceOrganicMatter
          MicroClimate: same as Experiments.HE1.HE1.paddock.MicroClimate
          Fertiliser
          Irrigation
          Report: same as Experiments.HE2.HE2.paddock.Report
          Operations operationsNWater
            1996-09-06  [Fertiliser].Apply(126, Fertiliser.Types.NO3N, 50);
            1996-09-16  [Fertiliser].Apply(105, Fertiliser.Types.NO3N, 50);
            1996-11-15  [Fertiliser].Apply(73, Fertiliser.Types.NO3N, 50);
            1996-12-31  [Fertiliser].Apply(59, Fertiliser.Types.NO3N, 50);
            1996-09-17  [Irrigation].Apply(29.6);
            1996-09-24  [Irrigation].Apply(12);
            1996-09-26  [Irrigation].Apply(5.8);
            1996-09-28  [Irrigation].Apply(17);
            1996-10-02  [Irrigation].Apply(9.25);
            1996-10-04  [Irrigation].Apply(9);
            1996-10-11  [Irrigation].Apply(21);
            1996-10-14  [Irrigation].Apply(7.25);
            1996-10-15  [Irrigation].Apply(8.5);
            1996-10-17  [Irrigation].Apply(8.5);
            1996-10-18  [Irrigation].Apply(13.5);
            1996-10-19  [Irrigation].Apply(3);
            1996-10-23  [Irrigation].Apply(11.4);
            1996-10-25  [Irrigation].Apply(9.5);
            1996-10-28  [Irrigation].Apply(9.5);
            1996-10-29  [Irrigation].Apply(23);
            1996-11-01  [Irrigation].Apply(7.5);
            1996-11-01  [Irrigation].Apply(10.4);
            1996-11-04  [Irrigation].Apply(10.8);
            1996-11-12  [Irrigation].Apply(20.3);
            1996-11-15  [Irrigation].Apply(26.5);
            1996-11-20  [Irrigation].Apply(18);
            1996-11-29  [Irrigation].Apply(24.7);
            1996-12-06  [Irrigation].Apply(10.5);
            1996-12-27  [Irrigation].Apply(30.5);
            1996-12-31  [Irrigation].Apply(8);
            1997-01-05  [Irrigation].Apply(30);
            1997-01-06  [Irrigation].Apply(31);
            1997-01-08  [Irrigation].Apply(14);
            1997-01-10  [Irrigation].Apply(14.5);
            1997-01-12  [Irrigation].Apply(14.5);
            1997-01-14  [Irrigation].Apply(11.4);
            1997-01-17  [Irrigation].Apply(14);
            1997-01-20  [Irrigation].Apply(7);
            1997-01-22  [Irrigation].Apply(8);
            1997-01-24  [Irrigation].Apply(16.6);
            1997-02-04  [Irrigation].Apply(8);
            1997-02-12  [Irrigation].Apply(20.6);
    Experiment LE15
      Memo
        This trial was conducted at Gatton in early 1997, and is linked with LE14. It consisted of 3 Genotypes: Buster, an Australian commercial line, M35-1, an Indian Rabi season landrace, and QL41/QL36, an Australian sorghum check for ... It was grown under non-limiting water and nitrogen conditions.  Yields were around 6.4 to 7.8 t/ha for the hybrids and 2.5 t/ha for the landrace.
      Factors
        Factor Genotype
          Factor Buster: Specifications=[operations]
            Operations
              1997-01-06  [Sorghum].Sow(population:10, cultivar:"Buster", depth:25, rowSpacing:500);
      Simulation LE15: Area=0; Slope=0
        Clock: StartDate=1996-09-05; EndDate=1997-05-08
        Summary summaryfile
        Weather: FileName=LE15.met
        SoilArbitrator Soil Arbitrator
        Zone paddock: Area=1; Slope=0
          Operations
            1997-01-06  [Sorghum].Sow(population:10, cultivar:"Buster", depth:25, rowSpacing:500);
          Soil GLHField: SoilType=GLHSoil; LocalName=Cooper Lab; Site=Cooper Lab; NearestTown=Gatton; Region=SE Queensland; NaturalVegetation=Unknown; Latitude=0; Longitude=0; Area=0
            Water: same as Experiments.LE13.LE13.paddock.GLHField.Water
            SoilWater: same as Experiments.LE13.LE13.paddock.GLHField.SoilWater
            SoilNitrogen: fom_type=[default, manure, mucuna, lablab, shemp, stable]; fract_carb=[0.2, 0.3, 0.54, 0.57, 0.45, 0]; fract_cell=[0.7, 0.3, 0.37, 0.37, 0.47, 0.1]; fract_lign=[0.1, 0.4, 0.09, 0.06, 0.08, 0.9]; wfpsN2N2O_x=[22, 88]; wfpsN2N2O_y=[0.1, 1]
            SoilOrganicMatter: same as Experiments.LE13.LE13.paddock.GLHField.SoilOrganicMatter
            Analysis: Thickness=[200, 200, 200, 300, 300, 300, 300]; PH=[8.2, 8.7, 8.9, 8.1, 8, 8, 8]; PHUnits=Water; BoronUnits=HotWater
            Sample Initial Water: Thickness=[200, 200, 200, 300, 300, 300, 300]; SW=[0.39, 0.47, 0.479, 0.422, 0.393, 0.379, 0.405]; NO3Units=ppm; NH4Units=ppm; SWUnits=Volumetric; OCUnits=Total; PHUnits=Water
            Sample Initial Nitrogen: NO3Units=ppm; NH4Units=ppm; SWUnits=Volumetric; OCUnits=Total; PHUnits=Water
              Thickness  NO3     NH4  PH
              200        11.624  0.1  8.2
              200        5.732   0.1  8.7
              200        2.974   0.1  8.9
              300        1.645   0.1  8.1
              300        1.902   0.1  8
              300        2.246   0.1  8
              300        1.942   0.1  8
          Plant Sorghum: CropType=Sorghum
          SurfaceOrganicMatter: same as Experiments.HE1.HE1.paddock.SurfaceOrganicMatter
          MicroClimate: same as Experiments.HE1.HE1.paddock.MicroClimate
          Fertiliser
          Irrigation
          Report: same as Experiments.HE2.HE2.paddock.Report
          Operations operationsNWater
            1997-01-06  [Irrigation].Apply(31);
            1997-01-08  [Irrigation].Apply(14);
            1997-01-10  [Irrigation].Apply(14);
            1997-01-12  [Irrigation].Apply(14);
            1997-01-14  [Irrigation].Apply(11);
            1997-01-17  [Irrigation].Apply(14);
            1997-01-20  [Irrigation].Apply(7);
            1997-01-22  [Irrigation].Apply(8);
            1997-01-24  [Irrigation].Apply(17);
            1997-02-04  [Irrigation].Apply(8);
            1997-02-12  [Irrigation].Apply(24);
            1997-02-26  [Irrigation].Apply(29);
            1997-03-11  [Irrigation].Apply(22);
            1997-03-19  [Irrigation].Apply(27);
            1997-03-27  [Irrigation].Apply(25);
            1997-04-03  [Irrigation].Apply(20);
            1997-04-09  [Irrigation].Apply(32);
            1997-04-18  [Irrigation].Apply(35);
            1997-04-27  [Irrigation].Apply(22);
            1997-01-03  [Fertiliser].Apply(161, Fertiliser.Types.NO3N, 50);
            1997-02-04  [Fertiliser].Apply(59, Fertiliser.Types.NO3N, 50);
            1997-03-11  [Fertiliser].Apply(59, Fertiliser.Types.NO3N, 50);
    Experiment LE17
      Memo
        This trial was conducted at Gatton in late 1997.  It consisted of 3 Genotypes: Buster, an Australian commercial line, M35-1, an Indian Rabi season landrace, and CSH13R, a single dwarf Indian hybrid. It was grown under non-limiting water and nitrogen conditions. Yields were around 6.3 to 8.2 t/ha for the hybrids and 3.8 t/ha for the landrace
      Factors
        Factor Genotype
          Factor Buster: Specifications=[operations]
            Operations
              1997-12-04  [Sorghum].Sow(population:10, cultivar:"Buster", depth:25, rowSpacing:500);
      Simulation LE17: Area=0; Slope=0
        Clock: StartDate=1997-11-27; EndDate=1998-04-09
        Summary summaryfile
        Weather: FileName=LE17.met
        SoilArbitrator Soil Arbitrator
        Zone paddock: Area=1; Slope=0
          Operations
            1997-12-04  [Sorghum].Sow(population:10, cultivar:"Buster", depth:25, rowSpacing:500);
          Soil GLHField: SoilType=GLHSoil; LocalName=Cooper Lab; Site=Cooper Lab; NearestTown=Gatton; Region=SE Queensland; NaturalVegetation=Unknown; Latitude=0; Longitude=0; Area=0
            Water: same as Experiments.LE13.LE13.paddock.GLHField.Water
            SoilWater: same as Experiments.LE13.LE13.paddock.GLHField.SoilWater
            SoilNitrogen: fom_type=[default, manure, mucuna, lablab, shemp, stable]; fract_carb=[0.2, 0.3, 0.54, 0.57, 0.45, 0]; fract_cell=[0.7, 0.3, 0.37, 0.37, 0.47, 0.1]; fract_lign=[0.1, 0.4, 0.09, 0.06, 0.08, 0.9]; wfpsN2N2O_x=[22, 88]; wfpsN2N2O_y=[0.1, 1]
            SoilOrganicMatter: same as Experiments.LE13.LE13.paddock.GLHField.SoilOrganicMatter
            Analysis: Thickness=[200, 200, 200, 300, 300, 300, 300]; PH=[7.7, 8.3, 8.4, 8.5, 8.5, 8.5, 8.6]; PHUnits=Water; BoronUnits=HotWater
            Sample Initial Water: Thickness=[200, 200, 200, 300, 300, 300, 300]; SW=[0.34, 0.412, 0.439, 0.434, 0.405, 0.399, 0.389]; NO3Units=ppm; NH4Units=ppm; SWUnits=Volumetric; OCUnits=Total; PHUnits=Water
            Sample Initial Nitrogen: NO3Units=ppm; NH4Units=ppm; SWUnits=Volumetric; OCUnits=Total; PHUnits=Water
              Thickness  NO3    NH4  PH
              200        5.187  0.1  7.7
              200        2.413  0.1  8.3
              200        6.5    0.1  8.4
              300        6.344  0.1  8.5
              300        6.814  0.1  8.5
              300        6.703  0.1  8.5
              300        3.092  0.1  8.6
          Plant Sorghum: CropType=Sorghum
          SurfaceOrganicMatter: same as Experiments.HE1.HE1.paddock.SurfaceOrganicMatter
          MicroClimate: same as Experiments.HE1.HE1.paddock.MicroClimate
          Fertiliser
          Irrigation
          Report: same as Experiments.HE2.HE2.paddock.Report
          Operations operationsNWater
            1997-12-04  [Irrigation].Apply(72);
            1997-12-17  [Irrigation].Apply(22);
            1997-12-29  [Irrigation].Apply(27);
            1998-01-06  [Irrigation].Apply(44);
            1998-01-19  [Irrigation].Apply(40);
            1998-02-10  [Irrigation].Apply(17);
            1998-03-05  [Irrigation].Apply(43);
            1998-03-18  [Irrigation].Apply(37);
            1997-12-03  [Fertiliser].Apply(187, Fertiliser.Types.NO3N, 50);
            1998-01-06  [Fertiliser].Apply(59, Fertiliser.Types.NO3N, 50);
            1998-02-10  [Fertiliser].Apply(59, Fertiliser.Types.NO3N, 50);
    Experiment LE19
      Memo
        This trial was conducted at Gatton in late 1998.  It consisted of 2 Genotypes: Buster, an Australian commercial line, and CSH13R, an Indian single dwarf hybrid with high RUE. There were 4 Nitrogen treatments (0, 120,240,360), and it was grown under non-limiting water conditions. Yields ranged from 4.5 t/ha to 8 t/ha.
      Factors
        Factor Genotype
          Factor Buster: Specifications=[operations]
            Operations
              1998-11-11  [Sorghum].Sow(population:10, cultivar:"Buster", depth:30, rowSpacing:500);
        Factor Nitrogen
          Factor 0: Specifications=[operationsN]
            Operations operationsN
          Factor 120: Specifications=[operationsN]
            Operations operationsN
              1998-11-11  [Fertiliser].Apply(120, Fertiliser.Types.NO3N, 50);
          Factor 240: Specifications=[operationsN]
            Operations operationsN
              1998-11-11  [Fertiliser].Apply(120, Fertiliser.Types.NO3N, 50);
              1998-12-13  [Fertiliser].Apply(60, Fertiliser.Types.NO3N, 50);
              1996-01-14  [Fertiliser].Apply(60, Fertiliser.Types.NO3N, 50);
          Factor 360: Specifications=[operationsN]
            Operations operationsN
              1998-11-11  [Fertiliser].Apply(120, Fertiliser.Types.NO3N, 50);
              1998-12-13  [Fertiliser].Apply(120, Fertiliser.Types.NO3N, 50);
              1999-01-14  [Fertiliser].Apply(120, Fertiliser.Types.NO3N, 50);
      Simulation LE19: Area=0; Slope=0
        Clock: StartDate=1998-11-09; EndDate=1999-03-07
        Summary summaryfile
        Weather: FileName=LE19.met
        SoilArbitrator Soil Arbitrator
        Zone paddock: Area=1; Slope=0
          Operations
            1998-11-11  [Sorghum].Sow(population:10, cultivar:"Buster", depth:25, rowSpacing:500);
          Soil GLHField: same as Experiments.LE17.LE17.paddock.GLHField
          Plant Sorghum: CropType=Sorghum
          SurfaceOrganicMatter: same as Experiments.HE1.HE1.paddock.SurfaceOrganicMatter
          MicroClimate: same as Experiments.HE1.HE1.paddock.MicroClimate
          Fertiliser
          Irrigation
          Report: same as Experiments.HE2.HE2.paddock.Report
          Operations operationsN
            1998-11-11  [Fertiliser].Apply(120, Fertiliser.Types.NO3N, 50);
            1998-12-13  [Fertiliser].Apply(120, Fertiliser.Types.NO3N, 50);
            1996-01-14  [Fertiliser].Apply(120, Fertiliser.Types.NO3N, 50);
          Operations operationsWater
            1997-12-04  [Irrigation].Apply(72);
    Experiment LE21
      Memo
        This trial was conducted at Gatton in late 1999.  It consisted of 3 Genotypes: QL39/QL36, a stay-green type, A35/QL36, a senescent type, and CSH13R, an Indian single dwarf hybrid with high RUE. There were 3 Nitrogen treatments (0, 45,360), and it was grown under non-limiting water conditions. Yields ranged from 3.8 t/ha to 9.5 t/ha.
      Factors
        Factor Genotype
          Factor QL39xQL36: Specifications=[operations]
            Operations
              1999-12-02  [Sorghum].Sow(population:10, cultivar:"QL39xQL36", depth:30, rowSpacing:500);
        Factor Nitrogen
          Factor 0: Specifications=[operationsN]
            Operations operationsN
          Factor 45: Specifications=[operationsN]
            Operations operationsN
              1999-11-29  [Fertiliser].Apply(45, Fertiliser.Types.NO3N, 50);
          Factor 360: Specifications=[operationsN]
            Operations operationsN
              1999-11-29  [Fertiliser].Apply(120, Fertiliser.Types.NO3N, 50);
              2000-01-07  [Fertiliser].Apply(120, Fertiliser.Types.NO3N, 50);
              2000-02-11  [Fertiliser].Apply(120, Fertiliser.Types.NO3N, 50);
      Simulation LE21: Area=0; Slope=0
        Clock: StartDate=1999-11-22; EndDate=2000-04-03
        Summary summaryfile
        Weather: FileName=LE21.met
        SoilArbitrator Soil Arbitrator
        Zone paddock: Area=1; Slope=0
          Operations
            1999-12-02  [Sorghum].Sow(population:10, cultivar:"QL39xQL36", depth:30, rowSpacing:500);
          Soil GLHField: SoilType=GLHSoil; LocalName=Cooper Lab; Site=Cooper Lab; NearestTown=Gatton; Region=SE Queensland; NaturalVegetation=Unknown; Latitude=0; Longitude=0; Area=0
            Water
              Thickness  BD    AirDry  LL15  DUL   SAT
              200        1.32  0.1     0.26  0.41  0.46
              200        1.3   0.15    0.26  0.43  0.48
              200        1.23  0.28    0.26  0.46  0.51
              300        1.27  0.28    0.26  0.44  0.49
              300        1.37  0.28    0.25  0.4   0.45
              300        1.35  0.3     0.28  0.41  0.46
              300        1.35  0.3     0.31  0.38  0.43
              SoilCrop SorghumSoil: LL=[0.3, 0.3, 0.35, 0.32, 0.29, 0.31, 0.31]; KL=[0.08, 0.08, 0.08, 0.08, 0.06, 0.04, 0.02]; XF=[1, 1, 1, 1, 1, 1, 1]
            SoilWater: same as Experiments.LE13.LE13.paddock.GLHField.SoilWater
            SoilNitrogen: fom_type=[default, manure, mucuna, lablab, shemp, stable]; fract_carb=[0.2, 0.3, 0.54, 0.57, 0.45, 0]; fract_cell=[0.7, 0.3, 0.37, 0.37, 0.47, 0.1]; fract_lign=[0.1, 0.4, 0.09, 0.06, 0.08, 0.9]; wfpsN2N2O_x=[22, 88]; wfpsN2N2O_y=[0.1, 1]
            SoilOrganicMatter: same as Experiments.LE13.LE13.paddock.GLHField.SoilOrganicMatter
            Analysis: Thickness=[200, 200, 200, 300, 300, 300, 300]; PH=[7.7, 8.3, 8.4, 8.5, 8.5, 8.5, 8.6]; PHUnits=Water; BoronUnits=HotWater
            Sample Initial Water: Thickness=[200, 200, 200, 300, 300, 300, 300]; SW=[0.41, 0.43, 0.46, 0.44, 0.4, 0.41, 0.38]; NO3Units=ppm; NH4Units=ppm; SWUnits=Volumetric; OCUnits=Total; PHUnits=Water
            Sample Initial Nitrogen: NO3Units=ppm; NH4Units=ppm; SWUnits=Volumetric; OCUnits=Total; PHUnits=Water
              Thickness  NO3    NH4  PH
              200        9.202  0.1  7.7
              200        4.403  0.1  8.3
              200        2.239  0.1  8.4
              300        1.237  0.1  8.5
              300        1.266  0.1  8.5
              300        1.77   0.1  8.5
              300        2.064  0.1  8.6
          Plant Sorghum: CropType=Sorghum
          SurfaceOrganicMatter: same as Experiments.HE1.HE1.paddock.SurfaceOrganicMatter
          MicroClimate: same as Experiments.HE1.HE1.paddock.MicroClimate
          Fertiliser
          Irrigation
          Report: same as Experiments.HE2.HE2.paddock.Report
          Operations operationsN
            1999-11-29  [Fertiliser].Apply(120, Fertiliser.Types.NO3N, 50);
            2000-01-07  [Fertiliser].Apply(120, Fertiliser.Types.NO3N, 50);
            2000-02-11  [Fertiliser].Apply(120, Fertiliser.Types.NO3N, 50);
          Operations operationsWater
            1999-12-03  [Irrigation].Apply(17);
            1999-12-06  [Irrigation].Apply(20);
            1999-12-17  [Irrigation].Apply(20);
            2000-01-07  [Irrigation].Apply(10);
            2000-01-14  [Irrigation].Apply(48);
            2000-01-27  [Irrigation].Apply(21);
            2000-02-04  [Irrigation].Apply(17);
            2000-02-11  [Irrigation].Apply(30);
            2000-02-25  [Irrigation].Apply(41);
            2000-03-03  [Irrigation].Apply(15);
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