Simulations Sorghum toolbox: Version=2
  Folder Cohorting leaf
    Plant Sorghum: CropType=Sorghum
      Memo TitlePage
        The APSIM Sorghum Model

        Brown, H.E., Teixeira, E.I., Huth, N.I. and Holzworth, D.P.

        The APSIM sorghum model has been developed using the Plant Modelling Framework (PMF) of Brown et al(2014).
        This new framework provides a library of plant organ and process submodels that can be coupled, at runtime, to construct a model in much the same way that models can be coupled to construct a simulation. This means that dynamic composition of lower level process and organ classes (e.g. photosynthesis, leaf) into larger constructions (e.g. sorghum, wheat, sorghum) can be achieved by the model developer without additional coding.
      OrganArbitrator Arbitrator: NArbitrationOption=PriorityThenRelativeAllocation; DMArbitrationOption=RelativeAllocation
        Memo
          There are a number of passes involved in the allocation of Weight (Wt).

          Wt_Step 1. Set up DM supplies and demands.  Each organ may have a demand for Structural, Metabolic and Non-structural Wt.  Each organ may supply Fresh DM from photosynthesis and/or stored DM from retranslocation of its Non-structural pool.

          Wt_Step 2. In this step freshly fixed Wt is partitioned to organs based on their relative Structural and Metabolic demands such that if there is not enough freshly fixed Wt to meet these demands the organs with the highest demands get the greatest share of the photosynthesis.

          Wt_Step 3. In the second step any freshly fixed DM that was surplus to Structural and Metabolic demands is partitioned to sink organs.  An organ will be a sink if it is parameterised to have a Non-structural (mobile) component and the capacity of each organ to receive excess DM depends on its structural fraction (which determines the Non-structural Fraction and subsequent sink capacity).  If there is still fresh DM unallocated after the second pass this remains unallocated with the assumption that in this case the plant would down regulate photosynthesis due to lack of sink capacity.

          Wt_Step 4. In this step, Non-structural DM is reallocated from Non-Structural pools if there was insufficient DM to meet the structural and metabolic DM demands of organs.

          The arbitrator then sends a potential DM allocation to each organ that they use to calculate their N demands and then steps through N partitioning routines.  The final pass in biomass partitioning comes after N partitioning

          N_Step 1. Set up N supplies and demands.  Each organ may (or may not) supply N in a number of ways.  Each organ has (potentially) a structural, metabolic and Non-structural N Demand.  The structural N demand is that required to grow immobile biomass components, Metabolic N is that required to produce working biomass such as the photosynthetic mechanism in the leaves.  The Non-structural N demand is considered to be the luxury uptake and storage of highly mobile N compounds such as nitrate.

          Each of the following 4 steps have a number of processes in common; Firstly the arbitrator determines each organs current N demand (that outstanding after previous N partitioning steps), then it allocates N to each demanding organ (There are three ways that N can be allocated, see below), then it sets for each supplying organ the amount of N that was taken up.

          N_Step 2. NReallocation.  This is the supply of N within the plant by the reallocation of sensing and/or Non-structural N which is the lowest energy form of N available to the plant so is partitioned first.

          N_Step 3. NUptake.  This is the supply of mineral N from the environment (typically by roots from the soil). In this step the arbitrator partitions the potential N uptake supply to satisfy all organs N demands (Structural, Metabolic and Non-structural).  If supply is sufficient this will replenish all Non-structural N that was reallocated in the previous step.  If not the N conc of organs with a Non-structural N component will begin to fall.  If total N demand is less than the uptake supply the crop will leave the surplus mineral N in the soil.

          N_Step 4. NFixation.  This is the supply of symbiotically fixed N and is redundant for Non-fixers!  The arbitrator will asks all N fixing organs (typically nodules) for their potential N fixation supply and then partition this to meet the Structural and Metabolic N demands of organs.  The arbitrator will not fix N to meet Non-structural N demands to minimise the biomass cost of fixation which is metabolically expensive.  Fixation follows uptake to enable the arbitrator to capture the "Lazy" N fixing behaviour of some legumes.  Once fixation is calculated the arbitrator determines the DM cost of this fixation.

          N_Step 5. NRetranslocation.  This is only invoked under sever N shortage when NReallocation and Uptake (and fixation if appropriate) cannot meet structural and metabolic N demands.  It this step the arbitrator will remove Metabolic N from older leaf cohorts to meet the N demand of new leaves and reproductive organs.

          In all of these N partitioning steps there are three options the developer may chose for determining the allocation of N between demanding organs.

          1. RelativeAllocation.  If this option is used all N is partitioned to organs relative to their demand so that the organs with the larger N demand get a larger share of a limited N supply.

          2. PriorityAllocation.  If this option is used the arbitrator steps through all organs in order of priority (set by the order they appear in the IDE) allocating N to meet all of the first organs structural and metabolic N demands before partitioning any to the next organ in the hierarchy.  Once it has stepped through all organs and allocated their minimum (structural and metabolic) N demands it will then step through them again and allocate their luxury (Non-structural) N demands in the same way.

          3. PrioritythenRelativeAllocation.  If this option is used the arbitrator steps through all organs in order of priority allocating N to meet minimum N demands.  However on the second pass it allocated N relative to the organs outstanding demands such that the organ with the greatest luxury N demand will get the greatest share of the N allocation.

          Wt_Step 5. Once N is allocated the arbitrator then reduces the Wt allocation of each organ to account for the metabolic cost of N fixation.  The Wt reduction is spread around all organs and an organ will only have its Wt allocation limited until it reaches maximum N conc.

          Wt_Step 6. Then the arbitrator determines if the N allocated to each organ is sufficient for that organ to reach its minimum N concentration.  If not the arbitrator will constrain the biomass growth of that organ and discards the surplus biomass.  This assume that under sever N stress photosynthesis would be down regulated due to N inadequacy limiting sink strength.

          Once these steps are complete the Arbitrator finally communicates to each organ its state changes as a result of arbitration.
      Phenology
        Memo
          The phenology model used in the APSIM sorghum model follows the approach used in earlier sorghum models(Jones and Kiniry (1986), Carberry and Arbrecht (1991), Carberry et al (1989).
          The model predicts development of primordia on the apex of the main stem and appearance of individual leaves to predict time to flag leaf.  Other stages use thermal time targets.
        MultiplyFunction ThermalTime
          PhaseLookup TT
            PhaseLookupValue TT: Start=Germination; End=Flowering
              AirTemperatureFunction ThermalTime
                XYPairs: X=[11, 30, 42]; Y=[0, 19, 0]
            PhaseLookupValue TTFM: Start=Flowering; End=Maturity
              AirTemperatureFunction ThermalTime
                XYPairs: X=[5.7, 23.5]; Y=[0, 17.8]
        GerminatingPhase Germinating: Start=Sowing; End=Germination
        EmergingPhase Emerging: Start=Germination; End=Emergence; ShootLag=15; ShootRate=0.6
          VariableReference ThermalTime: VariableName=[Phenology].ThermalTime.Value
        GenericPhase Juvenile: Start=Emergence; End=End_Juvenile
          Constant Target: Value=100
          VariableReference ThermalTime: VariableName=[Phenology].ThermalTime.Value
        GenericPhase JuvenileToFloralInit: Start=End_Juvenile; End=Floral_Initiation
          VariableReference ThermalTime: VariableName=[Phenology].ThermalTime.Value
          VariableReference Target: VariableName=[Phenology].TTTargetPhotoSensitive.Value
        GenericPhase FloralInitToFlagLeaf: Start=Floral_Initiation; End=Flag_Leaf
          VariableReference ThermalTime: VariableName=[Phenology].ThermalTime.Value
          SubtractFunction Target
            AddFunction TTEmergToFlagLeaf
              MultiplyFunction LeafAppearingPhase1
                SubtractFunction NoLeavesRate1
                  VariableReference FinalLeafNo: VariableName=[Phenology].FinalLeafNo.Value
                  VariableReference LeafNoAtEmergence: VariableName=[Phenology].LeafNoAtEmergence.Value
                  VariableReference LeafNoRateChange: VariableName=[Phenology].LeafNoRateChange.Value
                Constant LeafAppearanceRate1: Value=41
              MultiplyFunction LeafAppearingPhase2
                Constant LeafAppearanceRate2: Value=20
                VariableReference LeafNoRateChange: VariableName=[Phenology].LeafNoRateChange.Value
            VariableReference TTJuvenile: VariableName=[Phenology].Juvenile.Target.Value
            VariableReference TTJuvToFloralInit: VariableName=[Phenology].JuvenileToFloralInit.Target.Value
        GenericPhase FlagLeafToFlowering: Start=Flag_Leaf; End=Flowering
          Constant Target: Value=170
          VariableReference ThermalTime: VariableName=[Phenology].ThermalTime.Value
        GenericPhase FloweringToGrainFilling: Start=Flowering; End=StartGrainFill
          Constant Target: Value=80
          VariableReference ThermalTime: VariableName=[Phenology].ThermalTime.Value
        GenericPhase GrainFilling: Start=StartGrainFill; End=EndGrainFill
          VariableReference ThermalTime: VariableName=[Phenology].ThermalTime.Value
          SubtractFunction Target
            VariableReference FlowerToMaturity: VariableName=[Phenology].TTFIowerToMaturity.Value
            VariableReference FlowerToGrainFill: VariableName=[Phenology].FloweringToGrainFilling.Target.Value
            VariableReference GrainFillToMaturity: VariableName=[Phenology].TTGrainFillToMaturity.Value
        GenericPhase Maturing: Start=EndGrainFill; End=Maturity
          VariableReference ThermalTime: VariableName=[Phenology].ThermalTime.Value
          VariableReference Target: VariableName=[Phenology].TTGrainFillToMaturity.Value
        GenericPhase MaturityToHarvestRipe: Start=Maturity; End=HarvestRipe
          Constant Target: Value=1
          VariableReference ThermalTime: VariableName=[Phenology].ThermalTime.Value
        EndPhase ReadyForHarvesting: Start=HarvestRipe; End=Unused
          VariableReference ThermalTime: VariableName=[Phenology].ThermalTime.Value
        PhotoperiodFunction Photoperiod: Twilight=-6
        OnEventFunction FloweringDAS: SetEvent=Flowering; ReSetEvent=never
          Memo
            A function is used to provide flowering date as days after sowing(DAS).
          Constant PreEventValue: Value=0
          VariableReference PostEventValue: VariableName=[Phenology].DaysAfterSowing
        OnEventFunction MaturityDAS: SetEvent=Maturity; ReSetEvent=never
          Memo
            A function is used to provide maturity date as days after sowing(DAS).
          Constant PreEventValue: Value=0
          VariableReference PostEventValue: VariableName=[Phenology].DaysAfterSowing
        Constant TTFIowerToMaturity: Value=761
        Constant TTEndJuvToInit: Value=160
        MultiplyFunction TTGrainFillToMaturity
          VariableReference FlowerToMaturity: VariableName=[Phenology].TTFIowerToMaturity.Value
          Constant Proportion: Value=0.05
        OnEventFunction TTTargetPhotoSensitive: SetEvent=End_Juvenile; ReSetEvent=never
          VariableReference PreEventValue: VariableName=[Phenology].TTEndJuvToInit.Value
          AddFunction PostEventValue
            LinearInterpolationFunction PhotoModifier: XProperty=[Phenology].Photoperiod.Value
              XYPairs: X=[11.5, 13.5]; Y=[0, 23]
            VariableReference TTEndJuvToInit: VariableName=[Phenology].TTEndJuvToInit.Value
        Constant FinalLeafNo: Value=17.101
        Constant LeafNoAtEmergence: Value=1
        Constant LeafNoRateChange: Value=3.5
      Structure: InitialiseStage=Emergence; PrimaryBudNo=1
        Memo
          Though tillering is common in some sorghum varieties under certain agronomic conditions, no tillering is accounted for within this model.  Therefore all branching has been parameterised out of the current sorghum model.
        VariableReference ThermalTime: VariableName=[Phenology].ThermalTime.Value
        PhaseLookup MainStemPrimordiaInitiationRate
          PhaseLookupValue Plastochron: Start=Emergence; End=Floral_Initiation
            MultiplyFunction Plastochron
              VariableReference Phyllochron: VariableName=[Structure].MainStemNodeAppearanceRate.Value
              Constant LeafTipsPerPrimordia: Value=0.5
        PhaseLookup MainStemNodeAppearanceRate
          PhaseLookupValue Phyllochron2: Start=Emergence; End=End_Juvenile
            Constant LeafAppRate1: Value=20
          PhaseLookupValue Phyllochron: Start=End_Juvenile; End=Flag_Leaf
            Constant LeafAppRate2: Value=30
        MainStemFinalNodeNumberFunction MainStemFinalNodeNumber: MaximumMainStemNodeNumber=30
          OnEventFunction FinalLeafNumber: SetEvent=Floral_Initiation
            AddFunction PreEventValue
              Constant PrimordiaAtEmergence: Value=4
              DivideFunction PrimordiaDuringJuvenilePhase
                VariableReference JuvenilePhaseDuration: VariableName=[Phenology].Juvenile.Target.Value
                VariableReference ApproximatePlastochron: VariableName=[Structure].MainStemPrimordiaInitiationRate.Value
            VariableReference PostEventValue: VariableName=[Structure].MainStemPrimordiaNo
        HeightFunction HeightModel
          LinearInterpolationFunction PotentialHeight: XProperty=[Phenology].Stage
            XYPairs: X=[3, 4, 5, 6]; Y=[20, 50, 60, 1700]
        Constant BranchingRate: Value=0
        Constant ShadeInducedBranchMortality: Value=0
        Constant DroughtInducedBranchMortality: Value=0
      ReproductiveOrgan Grain: FractionRemoved=0; FractionToResidue=0
        Constant InitialGrainProportion: Value=0.05
        Constant MaximumPotentialGrainSize: Value=0.3
        PhaseLookup DMDemandFunction
          PhaseLookupValue InitialPhase: Start=Flowering; End=StartGrainFill
            FillingRateFunction
              VariableReference NumberFunction: VariableName=[Grain].NumberFunction.Value
              VariableReference FillingDuration: VariableName=[Phenology].FloweringToGrainFilling.Target.Value
              VariableReference ThermalTime: VariableName=[Phenology].ThermalTime.Value
              MultiplyFunction PotentialSizeIncrement
                VariableReference InitialProportion: VariableName=[Grain].InitialGrainProportion.Value
                VariableReference MaximumSize: VariableName=[Grain].MaximumPotentialGrainSize.Value
          PhaseLookupValue LinearPhase: Start=StartGrainFill; End=EndGrainFill
            FillingRateFunction
              VariableReference NumberFunction: VariableName=[Grain].NumberFunction.Value
              VariableReference FillingDuration: VariableName=[Phenology].GrainFilling.Target.Value
              VariableReference ThermalTime: VariableName=[Phenology].ThermalTime.Value
              MultiplyFunction PotentialSizeIncrement
                SubtractFunction ProportionLinearPhase
                  Constant One: Value=1
                  VariableReference InitialProportion: VariableName=[Grain].InitialGrainProportion.Value
                VariableReference MaximumSize: VariableName=[Grain].MaximumPotentialGrainSize.Value
        Biomass Live
        Biomass Dead
        Constant MinimumNConc: Value=0.008
        PhaseLookup MaximumNConc
          PhaseLookupValue InitialPhase: Start=Flowering; End=StartGrainFill
            Constant InitialNconc: Value=0.05
          PhaseLookupValue LinearPhase: Start=StartGrainFill; End=EndGrainFill
            Constant FinalNconc: Value=0.013
        Constant WaterContent: Value=0.12
        PhaseLookup NFillingRate
          PhaseLookupValue GrainFilling: Start=Flowering; End=EndGrainFill
            FillingRateFunction
              VariableReference NumberFunction: VariableName=[Grain].NumberFunction.Value
              AddFunction FillingDuration
                VariableReference FloweringToGrainFilling: VariableName=[Phenology].FloweringToGrainFilling.Target.Value
                VariableReference GrainFilling: VariableName=[Phenology].GrainFilling.Target.Value
              VariableReference ThermalTime: VariableName=[Phenology].ThermalTime.Value
              MultiplyFunction PotentialSizeIncrement
                Constant MaximumFinalNConc: Value=0.013; Units=g/g
                VariableReference MaximumSize: VariableName=[Grain].MaximumPotentialGrainSize.Value
        MultiplyFunction NumberFunction
          VariableReference CobNumber: VariableName=[Rachis].CobNumber.Value
          LinearInterpolationFunction KernalsPerCob: XProperty=[Rachis].CobSize.Value
            XYPairs: X=[0, 25]; Y=[0, 550]
          Constant GrainPerKernal: Value=1
      Root: FractionRemoved=0; FractionToResidue=0; InitialDM=0.2; SpecificRootLength=40000; KNO3_yProperty=[0, 0.03]; KNO3_xRootLength=[0, 0.003]; KNH4_yProperty=[0, 0.0003]; KNH4_xRootLength=[0, 0.003]; NuptakeSupply=0
        CompositeBiomass Live: Propertys=[[Root].LayerLive]
        CompositeBiomass Dead: Propertys=[[Root].LayerDead]
        LinearInterpolationFunction KLModifier: XProperty=[Sorghum].Population
          Memo
            The parameter KL is is described by Meinke et al (1993) to combine elements of soil conductivity (K) with root length (L) in determining root water uptake.  Peake et al (2013) demonstrated that in sorghum KL varied with plant population through impacts on root length density.  Here we adjust KL linearly with plant population.
          XYPairs: X=[0, 10]; Y=[1, 1]
        Constant SoilWaterEffect: Value=1
          Memo
            No effect of soil water content on root growth is currently captured in the model.
        Constant TemperatureEffect: Value=1
          Memo
            No effect of temperature on root growth is currently captured in the model.
        Constant MaxDailyNUptake: Value=20
          Memo
            Maximum daily N uptake is set to an arbitrarily high value.
        Constant SenescenceRate: Value=0.005
          Memo
            Jones and Kiniry (1986) used a constant root senescence fraction in the CERES-Sorghum model.
        Constant StructuralFraction: Value=1
        Constant MaximumNConc: Value=0.01
        Constant MinimumNConc: Value=0.01
        LinearInterpolationFunction PartitionFraction: XProperty=[Phenology].Stage
          XYPairs: X=[0, 2.99, 3, 6, 7]; Y=[0, 0, 0.2, 0.2, 0]
        PhaseLookup RootFrontVelocity
          Memo
            Hammer et al (2009) used a constant extraction front velocity of 2.5cm per day in their analysis of historical sorghum yield trends in the US corn belt.
          PhaseLookupValue PreFlowering: Start=Germination; End=Flowering
            Constant Function: Value=25
          PhaseLookupValue PostFlowering: Start=Flowering; End=Maturity
            Constant Function: Value=0
        PhaseBasedSwitch NitrogenDemandSwitch: Start=Germination; End=Maturity
      Leaf: MaxCover=1; R50=200; KDead=0.03
        zero: FractionRemoved, FractionToResidue, CurrentExpandingLeaf, StartFractionExpanded, FractionNextleafExpanded, _ExpandedNodeNo, DeadNodesYesterday, Albedo, Gsmax, FRGR, PotentialEP, FractionDied
        LeafCohort InitialLeaves[1]: Rank=1; Area=380
        LeafCohort InitialLeaves[2]: Rank=2; Area=0
        LeafCohort InitialLeaves[3]: Rank=3; Area=0
        LeafCohort InitialLeaves[4]: Rank=4; Area=0
        CompositeBiomass Live: Propertys=[[Leaf].CohortLive]
        CompositeBiomass Dead: Propertys=[[Leaf].CohortDead]
        ArrayBiomass CohortArrayLive: Propertys=[[Leaf].Live]; ArraySize=[Leaf].MaxNodeNo
        ArrayBiomass CohortArrayDead: Propertys=[[Leaf].Dead]; ArraySize=[Leaf].MaxNodeNo
        LeafCohortParameters CohortParameters
          BellCurveFunction MaxArea
            Memo
              Potential leaf area is calculated from leaf number using the approach of Keating and Wafula (1992).
              Individual leaf size is described using a bell-shaped curve, the parameters of which are derived from final leaf number.
            MultiplyFunction LargestLeafPosition
              VariableReference FinalLeafNumber: VariableName=[Structure].MainStemFinalNodeNumber.Value
              Constant RelativePositionOfLargestLeaf: Value=0.67
            LinearInterpolationFunction AreaMax: XProperty=[Structure].MainStemFinalNodeNumber.Value
              XYPairs: X=[1, 5, 10, 15, 20, 25]; Y=[32530, 39259, 49659, 60000, 75000, 90000]
            LinearInterpolationFunction Breadth: XProperty=[Structure].MainStemFinalNodeNumber.Value
              XYPairs: X=[5, 10, 15, 20, 25]; Y=[-0.377, -0.144, -0.059, -0.027, -0.016]
            Constant Skewness: Value=0.00025
          Constant NReallocationFactor: Value=0.1
          Constant NRetranslocationFactor: Value=0.03
          Constant DMRetranslocationFactor: Value=0.5
          LinearInterpolationFunction CellDivisionStress: XProperty=[Sorghum].WaterSupplyDemandRatio
            XYPairs: X=[0.9, 1]; Y=[1, 1]
          LinearInterpolationFunction ExpansionStress: XProperty=[Sorghum].WaterSupplyDemandRatio
            XYPairs: X=[0.3, 1]; Y=[0.1, 1]
          LinearInterpolationFunction GrowthDuration: XProperty=[Structure].RelativeNodeApperance
            XYPairs: X=[0, 0.3, 0.5, 1]; Y=[0, 200, 250, 100]
          LinearInterpolationFunction LagDuration: XProperty=[Structure].RelativeNodeApperance
            XYPairs: X=[0, 0.5, 1]; Y=[350, 650, 600]
          LinearInterpolationFunction SenescenceDuration: XProperty=[Structure].RelativeNodeApperance
            XYPairs: X=[0, 11, 20]; Y=[359, 350, 350]
          Constant DetachmentLagDuration: Value=1000000
          Constant DetachmentDuration: Value=1000000
          LinearInterpolationFunction MaximumNConc: XProperty=[Structure].MainStemNodeNo
            XYPairs: X=[1, 10]; Y=[0.04, 0.02]
          Constant CriticalNConc: Value=0.015
          Constant MinimumNConc: Value=0.008
          AddFunction DroughtInducedSenAcceleration
            Constant One: Value=1
            MultiplyFunction Stress
              Constant StressResponseCoefficient: Value=1
              LinearInterpolationFunction StressFactor: XProperty=[Sorghum].WaterSupplyDemandRatio
                XYPairs: X=[0, 0.7]; Y=[0, 0]
          LinearInterpolationFunction SpecificLeafAreaMax: XProperty=[Structure].MainStemNodeNo
            XYPairs: X=[1, 9]; Y=[60000, 30000]
          LinearInterpolationFunction SpecificLeafAreaMin: XProperty=[Structure].MainStemNodeNo
            XYPairs: X=[1, 9]; Y=[6000, 6000]
          Constant StructuralFraction: Value=0.7
          Constant NonStructuralFraction: Value=0
          LinearInterpolationFunction ShadeInducedSenescenceRate: XProperty=[Leaf].CohortCurrentRankCoverAbove
            XYPairs: X=[0, 0.7, 0.8, 0.96, 0.99]; Y=[0, 0, 0, 0, 0]
          Constant InitialNConc: Value=0
        RUEModel Photosynthesis
          Constant RUE: Value=1.75
          WeightedTemperatureFunction FT: MaximumTemperatureWeighting=0.75
            XYPairs: X=[0, 8, 15, 35, 50]; Y=[0, 0, 1, 1, 0]
          LinearInterpolationFunction FVPD: XProperty=[Leaf].Photosynthesis.VPD
            XYPairs: X=[0, 10, 50]; Y=[1, 1, 1]
          LinearInterpolationFunction FN: XProperty=[Leaf].Fn
            XYPairs: X=[0, 1]; Y=[0.3, 1]
          LinearInterpolationFunction FW: XProperty=[Leaf].Fw
            XYPairs: X=[0, 0.3]; Y=[0, 1]
          RUECO2Function FCO2: PhotosyntheticPathway=C4
          VariableReference RadnInt: VariableName=[Leaf].RadIntTot
        MultiplyFunction ExtinctionCoeff
          Memo
            Extinction coefficient is specified in terms of a potential extinction coefficient which is then discounted during periods of water stress to account for the impact of leaf curling.
          LinearInterpolationFunction PotentialExtinctionCoeff: XProperty=[Leaf].LAI
            XYPairs: X=[0, 0.45]; Y=[0.65, 0.65]
          LinearInterpolationFunction WaterStressImpact: XProperty=[Sorghum].WaterSupplyDemandRatio
            XYPairs: X=[0, 0.7]; Y=[0.5, 1]
        LinearInterpolationFunction FrostFraction: XProperty=[Weather].MinT
          XYPairs: X=[-10, -9]; Y=[1, 0]
        VariableReference ThermalTime: VariableName=[Phenology].ThermalTime.Value
        MinimumFunction FRGRFunction
          VariableReference RUE_FT: VariableName=[Leaf].Photosynthesis.FT.Value
          MinimumFunction Others
            VariableReference RUE_FN: VariableName=[Leaf].Photosynthesis.FN.Value
            VariableReference RUE_FVPD: VariableName=[Leaf].Photosynthesis.FVPD.Value
      GenericAboveGroundOrgan Husk: FractionRemoved=0; FractionToResidue=0
        PopulationBasedDemandFunction DMDemandFunction
          VariableReference ThermalTime: VariableName=[Phenology].ThermalTime.Value
          Constant ExpansionStress: Value=1
          Constant OrganPopulation: Value=4
          Constant MaximumOrganWt: Value=0.7
          Constant StartStage: Value=5.2
          Constant GrowthDuration: Value=453
        Biomass Live
        Biomass Dead
        Constant NReallocationFactor: Value=0
        Constant NRetranslocationFactor: Value=0.1
        Constant MaximumNConc: Value=0.01
        Constant StructuralFraction: Value=0.2
        Constant MinimumNConc: Value=0.01
      GenericAboveGroundOrgan Rachis: FractionRemoved=0; FractionToResidue=0
        MultiplyFunction CobNumber
          VariableReference StemNumber: VariableName=[Structure].TotalStemPopn
          Constant CobsPerStem: Value=1.1
        DivideFunction CobSize
          VariableReference CobMass: VariableName=[Rachis].Live.Wt
          VariableReference CobNumber: VariableName=[Rachis].CobNumber.Value
        PopulationBasedDemandFunction DMDemandFunction: same as Cohorting leaf.Sorghum.Husk.DMDemandFunction
        Biomass Live
        Biomass Dead
        Constant NReallocationFactor: Value=0
        Constant NRetranslocationFactor: Value=0.1
        Constant MaximumNConc: Value=0.008
        Constant StructuralFraction: Value=1
        Constant MinimumNConc: Value=0.003
        LinearInterpolationFunction ExpansionStress: XProperty=[Sorghum].WaterSupplyDemandRatio
          XYPairs: X=[0, 0.6]; Y=[1, 1]
      GenericAboveGroundOrgan Stem: FractionRemoved=0; FractionToResidue=0
        Biomass Live
        Biomass Dead
        Constant StructuralFraction: Value=0.8
        LinearInterpolationFunction MaximumNConc: XProperty=[Structure].MainStemNodeNo
          XYPairs: X=[1, 10, 11]; Y=[0.03, 0.03, 0.005]
        Constant MinimumNConc: Value=0.006
        PhaseBasedSwitch NitrogenDemandSwitch: Start=Emergence; End=StartGrainFill
        Constant NReallocationFactor: Value=0
        Constant NRetranslocationFactor: Value=0.5
        Constant DMRetranslocationFactor: Value=0.5
        MinimumFunction DMDemandFunction
          MultiplyFunction PotentialDMAccumulation
            VariableReference NodesAppearing: VariableName=[Structure].DeltaNodeNumber
            VariableReference Branches: VariableName=[Structure].TotalStemPopn
            LinearInterpolationFunction PotentialInternodeWt: XProperty=[Structure].RelativeNodeApperance
              XYPairs: X=[0, 0.5, 1]; Y=[0, 0.2, 16]
          MultiplyFunction HightLimitedDMAccumulation
            Constant SpecificStemLengthMax: Value=500
            VariableReference Branches: VariableName=[Structure].TotalStemPopn
            VariableReference DeltaHeight: VariableName=[Structure].HeightModel.DeltaHeight
      Cultivar Buster
      Memo References
        References

        Brown, H.E., Huth, N.I., Holzworth, D.P., Teixeira, E.I., Zyskowski, R.F., Hargreaves, J.N., Moot, D.J., 2014. Plant modelling framework: software for building and running crop models on the APSIM platform. Environmental Modelling & Software 62 385-398.

        Hammer, G.L., Dong, Z., McLean, G., Doherty, A., Messina, C., Schussler, J., Zinselmeier, C., Paszkiewicz, S., Cooper, M., 2009. Can Changes in Canopy and/or Root System Architecture Explain Historical Sorghum Yield Trends in the U.S. Corn Belt? Crop Science 49(1) 299-312.

        Jones, C.A. and Kiniry, J.R. (1986) CERES-Sorghum: a Simulation Model of Sorghum Growth and Development. Texas A&M University Press, College Station, 194pp.

        B.A. Keating and Wafula, B.M. (1992) Modelling the fully expanded leaf area of sorghum leaves Field Crops Research, 29 163 176

        Meinke, H., Hammer, G.L., Want, P., 1993. POTENTIAL SOIL-WATER EXTRACTION BY SUNFLOWER ON A RANGE OF SOILS. Field Crops Research 32(1-2) 59-81.

        Ning, P., Li, S., White, P.J., Li, C., 2015. Sorghum Varieties Released in Different Eras Have Similar Root Length Density Distributions in the Soil, Which Are Negatively Correlated with Local Concentrations of Soil Mineral Nitrogen. PLoS ONE 10(3) e0121892.

        Njoroge, K., 1986. Earliness and yield in sorghum: an evaluation of some Katumani sorghum varieties. East African Agricultural and Forestry Journal 48(1/4) 40-50.

        Peake, A.S., Huth, N.I., Kelly, A.M., Bell, K.L., 2013. Variation in water extraction with sorghum plant density and its impact on model application. Field Crops Research 146(0) 31-37.
  Folder TPLA
    Plant Sorghum: CropType=Sorghum
      Memo TitlePage: same as Cohorting leaf.Sorghum.TitlePage
      OrganArbitrator Arbitrator: same as Cohorting leaf.Sorghum.Arbitrator
      Phenology
        Memo: same as Cohorting leaf.Sorghum.Phenology.memo
        MultiplyFunction ThermalTime: same as Cohorting leaf.Sorghum.Phenology.ThermalTime
        GerminatingPhase Germinating: Start=Sowing; End=Germination
        EmergingPhase Emerging: Start=Germination; End=Emergence; ShootLag=15; ShootRate=0.6
          VariableReference ThermalTime: VariableName=[Phenology].ThermalTime.Value
        GenericPhase Juvenile: Start=Emergence; End=End_Juvenile
          Constant Target: Value=100
          VariableReference ThermalTime: VariableName=[Phenology].ThermalTime.Value
        GenericPhase JuvenileToFloralInit: Start=End_Juvenile; End=Floral_Initiation
          VariableReference ThermalTime: VariableName=[Phenology].ThermalTime.Value
          VariableReference Target: VariableName=[Phenology].TTTargetPhotoSensitive.Value
        GenericPhase FloralInitToFlagLeaf: Start=Floral_Initiation; End=Flag_Leaf
          VariableReference ThermalTime: VariableName=[Phenology].ThermalTime.Value
          SubtractFunction Target
            VariableReference TTEmergToFlag
            VariableReference TTJuvenile: VariableName=[Phenology].Juvenile.Target.Value
            VariableReference TTJuvToFloralInit: VariableName=[Phenology].JuvenileToFloralInit.Target.Value
        GenericPhase FlagLeafToFlowering: Start=Flag_Leaf; End=Flowering
          Constant Target: Value=170
          VariableReference ThermalTime: VariableName=[Phenology].ThermalTime.Value
        GenericPhase FloweringToGrainFilling: Start=Flowering; End=StartGrainFill
          Constant Target: Value=80
          VariableReference ThermalTime: VariableName=[Phenology].ThermalTime.Value
        GenericPhase GrainFilling: same as Cohorting leaf.Sorghum.Phenology.GrainFilling
        GenericPhase Maturing: Start=EndGrainFill; End=Maturity
          VariableReference ThermalTime: VariableName=[Phenology].ThermalTime.Value
          VariableReference Target: VariableName=[Phenology].TTGrainFillToMaturity.Value
        GenericPhase MaturityToHarvestRipe: Start=Maturity; End=HarvestRipe
          Constant Target: Value=1
          VariableReference ThermalTime: VariableName=[Phenology].ThermalTime.Value
        EndPhase ReadyForHarvesting: Start=HarvestRipe; End=Unused
          VariableReference ThermalTime: VariableName=[Phenology].ThermalTime.Value
        PhotoperiodFunction Photoperiod: Twilight=-6
        OnEventFunction FloweringDAS: same as Cohorting leaf.Sorghum.Phenology.FloweringDAS
        OnEventFunction MaturityDAS: same as Cohorting leaf.Sorghum.Phenology.MaturityDAS
        Constant TTFIowerToMaturity: Value=761
        Constant TTEndJuvToInit: Value=160
        MultiplyFunction TTGrainFillToMaturity
          VariableReference FlowerToMaturity: VariableName=[Phenology].TTFIowerToMaturity.Value
          Constant Proportion: Value=0.05
        OnEventFunction TTTargetPhotoSensitive: same as Cohorting leaf.Sorghum.Phenology.TTTargetPhotoSensitive
        Constant FinalLeafNo: Value=17.101
        Constant LeafNoAtEmergence: Value=1
        Constant LeafNoRateChange: Value=3.5
        AddFunction TTEmergToFlagLeaf: same as Cohorting leaf.Sorghum.Phenology.FloralInitToFlagLeaf.Target.TTEmergToFlagLeaf
        AccumulateFunction TTFromEmergence: StartStageName=Emergence; EndStageName=Maturity
          VariableReference ThermalTime: VariableName=[Phenology].ThermalTime.Value
      Structure: same as Cohorting leaf.Sorghum.Structure
      ReproductiveOrgan Grain: same as Cohorting leaf.Sorghum.Grain
      Root: same as Cohorting leaf.Sorghum.Root
      SimpleLeaf Leaf: R50=200; KDead=0.03
        zero: FractionRemoved, FractionToResidue, BiomassYesterday, Albedo, Gsmax, LAI, Height, FRGR, PotentialEP, K, DeltaBiomass, LAIDead, WaterAllocation
        CompositeBiomass Live: Propertys=[[Leaf].CohortLive]
        CompositeBiomass Dead: Propertys=[[Leaf].CohortDead]
        RUEModel Photosynthesis: same as Cohorting leaf.Sorghum.Leaf.Photosynthesis
        MultiplyFunction ExtinctionCoeff: same as Cohorting leaf.Sorghum.Leaf.ExtinctionCoeff
        LinearInterpolationFunction FrostFraction: XProperty=[Weather].MinT
          XYPairs: X=[-10, -9]; Y=[1, 0]
        MinimumFunction FRGRFunction: same as Cohorting leaf.Sorghum.Leaf.FRGRFunction
        VariableReference ThermalTime: VariableName=[Phenology].ThermalTime.Value
        Constant FTN: Value=0.1
        MultiplyFunction TPLAMax
          Constant cm2Tomm2: Value=100
          PowerFunction: Exponent=1
            AddFunction
              VariableReference FTN: VariableName=[Leaf].FTN.Value
              Constant One: Value=1
            Constant TillerCoeff: Value=0.1
          PowerFunction PowerFunction1: Exponent=1
            VariableReference FLN: VariableName=[Structure].MainStemFinalNodeNumber.Value
            Constant MainStemCoeff: Value=0.1
        LessThanFunction
          VariableReference TTFromEmergence: VariableName=[Phenology].TTFromEmergence.Value
          Constant: Value=80
          MultiplyFunction
            DivideFunction
              VariableReference TTFromEmergence: VariableName=[Phenology].TTFromEmergence.Value
              Constant: Value=80
            DivideFunction tpla80
              VariableReference TPLAMax: VariableName=[Leaf].TPLAMax.Value
      GenericAboveGroundOrgan Husk: same as Cohorting leaf.Sorghum.Husk
      GenericAboveGroundOrgan Rachis: same as Cohorting leaf.Sorghum.Rachis
      GenericAboveGroundOrgan Stem: same as Cohorting leaf.Sorghum.Stem
      Cultivar Buster
      Memo References: same as Cohorting leaf.Sorghum.References
  Folder Functions
    SoilTemperatureWeightedFunction
    SplineInterpolationFunction
    StageBasedInterpolation: Proportional=true
    SubtractFunction
    WeightedTemperatureFunction: MaximumTemperatureWeighting=0
    XYPairs
    Zadok
    AccumulateFunction
    AddFunction
    AgeCalculatorFunction
    AirTemperatureFunction
    BellCurveFunction
    Constant: Value=0
    DeltaFunction
    DivideFunction
    ExpressionFunction
    ExternalVariable
    HoldFunction
    InPhaseTtFunction
    LessThanFunction
    LinearInterpolationFunction
    MaximumFunction
    MinimumFunction
    MultiplyFunction
    OnEventFunction
    PhaseBasedSwitch
    PhaseLookup
    PhaseLookupValue
    PhotoperiodDeltaFunction: Twilight=0
    PhotoperiodFunction: Twilight=0
    PowerFunction: Exponent=1
    SigmoidFunction: Xmax=1; Xo=1; b=1
    SigmoidFunction2
    SoilTemperatureDepthFunction: Depth=0
    SoilTemperatureFunction: maxt_soil_surface=20; mint_soil_surface=10
  Folder DemandFunctions
    RelativeGrowthRateDemandFunction: InitialWt=0
    AllometricDemandFunction: Const=0; Power=0
    FillingRateFunction
    InternodeDemandFunction
    PartitionFractionDemandFunction
    PopulationBasedDemandFunction
    PotentialSizeDemandFunction
  Folder StructureFunctions
    MainStemFinalNodeNumberFunction: MaximumMainStemNodeNumber=0
    HeightFunction
    InPhaseTemperatureFunction
  Folder SupplyFunctions
    RUEModel
    RUECO2Function
