Simulations: Version=69
  Simulation WheatSheep
    Memo
      Di Mayberry (10/5/18)

      Sheep grazing wheat and fed in feedlot
      -

      In this simulation sheep are bought and sold on a specified date. There is also working code that allows sheep to be sold based on age and purchased to maintain flock size. This was causing some errors with supplement feeding, so was turned off.

      There are two paddocks. A feedlot that contains sheep fed supplement, and a continous wheat crop. Sheep are moved from the feedlot onto the wheat crop based on crop biomass and zadok stage.

      Manage_stock
      -
      1. Buy animals at start of year & put in feedlot
      2. Move animals from feedlot to crop when ready to graze
      3. Move animals from crop to feedlot
      4. Shear all animals on specified date
      5. Sell all animals at end of year

      Manage_supplement
      -
      1. Feeds stock supplement at set amount in feedlot only
      2. Restocks supplement store when reaches minimum level

      Errors to fix
      -
      1. When an animal dies, extra supplement is fed (see spikes in supp intake graph)
      2. When sheep are culled for age + purchased to maintain stocking rate, several groups of sheep are created.
      This causes irregular amounts of supplement to be fed.
    Report: EventNames=[Clock].EndOfDay
      VariableNames:
        [Clock].Today
        [Stock].Paddock as StockLocation
        [Stock].NumberAll as StockCount
        [Stock].NumberAll / [Paddock].Area as StockingRate  //(sheep/ha)
        [Stock].WeightAll as Weight // (kg)
        [Stock].IntakeAll.Weight as Intake
        [Stock].CondScoreAll as ConditionScore
        [Stock].WtChangeAll as MeanWeightChange
        [Stock].MilkWtAll * 0.04 * 0.08 + [Stock].MilkWtAll * 0.04 as MilkSolids
        [Stock].PastIntakeAll.Weight as PastureIntake
        [Stock].SuppIntakeAll.Weight as SupplimentIntake
        [Stock].FleeceWt as FleeceWeight
        [Stock].MEIntakeAll as MEIntake
        [ManageStock].Script.EventName as Event
        [ManageStock].Script.NumberSold as NumberSold
        [Paddock].Wheat.AboveGround.Wt*10 as PlantBiomass   // kg/ha
        [Paddock].Wheat.Grain.Wt*10 as PlantYield           // kg/ha
        [PaddockNotGrazed].Wheat.AboveGround.Wt*10 as PlantBiomassNG   // kg/ha
        [PaddockNotGrazed].Wheat.Grain.Wt*10 as PlantYieldNG           // kg/ha\
        [Paddock].Wheat.Phenology.Zadok.Stage
    Clock: Start=2000-01-01; End=2000-12-31
    Summary SummaryFile
    Weather: FileName=%root%\Examples\WeatherFiles\lincoln.met
    SoilArbitrator
    Stock: RandSeed=9999
      GenoTypes:
        {Conception=[0, 0.54, 0.41, 0], Name=SmallMerino, DamBreed=Small Merino, Generation=0, SRW=40, DeathRate=0.02, RefFleeceWt=3.6, MaxFibreDiam=19, FleeceYield=0.7, PeakMilk=0, WnrDeathRate=0.02}
      PaddockList:
        {Area=1, Slope=0}
    Supplement: SpoilageTime=0
      Stores:
        Name            Stored  IsRoughage  DMContent  DMD  MEContent  CPConc  ProtDg  PConc   SConc   EEConc  ADIP2CP  AshAlk  MaxPassage
        fodder          0       true        0.85       0    0          0       0       0       0       0       0        0       0
        wheat, crushed  500000  false       1          0.9  13.8       0.14    0.92    0.0038  0.0014  0.02    0.02     0.18    0
    Manager ManageStock
      Buying = True
      AnimalType = SmallMerino
      Sex = Wethers
      BuyDate = 15-Jan
      BuyAge = 18
      BuyWeight = 30
      BuyLactating = 0
      NumAntoBuy = 50
      Selling = True
      SellPolicy = Date
      SaleAge = 0
      SaleWeight = 0
      SaleDate = 15-Dec
      SalePercentAnimals = 100
      PaddockToMoveAnimalsTo = [Paddock]
      MoveAnimalStartDate = 1-jan
      MoveAnimalEndDate = 31-dec
      BiomassThresholdToMoveAnimalsIn = 300
      ZadokThresholdToMoveAnimalsIn = 0
      BiomassThresholdToMoveAnimalsOut = 150
      ZadokThresholdToMoveAnimalsOut = 31
      ShearDate = 10-may
      Dummy =
      NumberSold = 0
      EventName =
```csharp
/*-------------------------------------------------------------------------------------
Sheep grazing wheat when conditions are suitable, and in feedlot the rest of the time.
---------------------------------------------------------------------------------------

In this example simulation sheep are bought and sold on specified date.
They are fed supplement in a feedlot at a set rate, but graze a wheat crop when crop biomass >= 2.4 t/ha.
Sheep are moved from the wheat crop and back to feedlot when crop biomass reaches 0.5 t/ha or crop zadok = 31.

Based on Sprague SJ, Kirkegaard JA, Dove H, Graham JM, McDonald SE, Kelman WM (2015) Integrating dual-purpose wheat and canola into high-rainfall livestock systems in south-eastern Australia. 1. Crop forage and grain yield. Crop and Pasture Science 66(4), 365-376. 

Activities in this manager:
1. Buy animals at start of year & put in feedlot
2. Move animals from feedlot to crop when ready to graze
3. Move animals from crop to feedlot 
4. Shear all animals on specified date
5. Sell all animals at end of year

ERRORS TO FIX
1. When an animal dies, extra supplement is fed (see spikes in supp intake graph)
2. When sheep are culled for age + purchased to maintain stocking rate, several groups of sheep are created.
This causes irregular amounts of supplement to be fed.
--------------------------------------------------------------------------------------*/


using System;
using Models.Core;
using Models.PMF;
using Models.Soils;
using Models.Utilities;
using Models.GrazPlan;
using APSIM.Shared.Utilities;
using System.Diagnostics;

namespace Models
{
    [Serializable]
    public class Script : Model
    {
        [Link] Clock clock;
        [Link] Stock Animals;
        [Link] Supplement Feed;
        [Link] Summary Summary;
        [Link] IPlant plant;
        [Link] Soil Soil; 
        [Link] Zone Paddock;

        private bool isGrazingCrop = false;
        private int tag = 1;

        public enum AnType
		{		
            Friesian,
            Jersey,
            SmallMerino
        }

        public enum Gender
        {
            Bulls,
            Cows,
            Steers,
            Heifers,
            Calves,
            Ewes,
            Rams,
            Wethers
        }

        public enum SellPolicyType
        {
            Date,
            Weight,
            Age
        }

		[Separator("Buying of animals")]

		[Description("Buy animals?")] 
		public bool Buying { get; set; }

		[Description("Breed of animal (must be chosen in Stock): ")] 
		[Display(EnabledCallback="BuyingEnabled")]
		public AnType AnimalType { get; set; }

		[Description("Type of animal bought: ")] 
		[Display(EnabledCallback="BuyingEnabled")]
		public Gender Sex { get; set; }

		[Description("Date to buy animals (dd-mmm)")] 
		[Display(EnabledCallback="BuyingEnabled")]
		public string BuyDate { get; set; }

		[Description("Age of bought animals (months): ")] 
		[Display(EnabledCallback="BuyingEnabled")]
		public double BuyAge { get; set; }

		[Description("Weight of bought animals (kg): ")] 
		[Display(EnabledCallback="BuyingEnabled")]
		public double BuyWeight { get; set; }

		[Description("Zero denotes not lactating; 1 or more denotes the time (days) since parturition:")] 
		[Display(EnabledCallback="BuyingEnabled")]
		public int BuyLactating { get; set; }

		[Description("Number of animals to buy: ")] 
		[Display(EnabledCallback="BuyingEnabled")]
		public int NumAntoBuy { get; set; }

		[Separator("Selling of animals")]

		[Description("Sell animals using this manager (tick) or use operations file (no tick); ensure operations are dis/enabled as required ")] 
		[Display(EnabledCallback="SellingEnabled")]
		public bool Selling { get; set; }

		[Description("Sell animals based on Age, Weight or Day of Year ")] 
		[Display(EnabledCallback="SellingEnabled")]
		public SellPolicyType SellPolicy { get; set; }

		[Description("Age at which to sell (months): ")] 
		[Display(EnabledCallback="SellingEnabled")]
		public double SaleAge { get; set; }

		[Description("Weight at which to sell (kg): ")] 
		[Display(EnabledCallback="SellingEnabled")]
		public double SaleWeight { get; set; }

		[Description("Date to sell animals (dd-mmm)")] 
		[Display(EnabledCallback="SellingEnabled")]
		public string SaleDate { get; set; }

		[Description("Percentage of animals to sell (%)")] 
		[Display(EnabledCallback="SellingEnabled")]
		public double SalePercentAnimals { get; set; }

		[Separator("Rule for moving animals into and out of paddock")]

		[Description("Name of paddock to move animals in to:")] 
		[Display(Type=DisplayType.Model, ModelType=typeof(Zone))]
		public IModel PaddockToMoveAnimalsTo { get; set; }

		[Description("First date to consider moving animals:")] 
		public string MoveAnimalStartDate { get; set; }

		[Description("Last date to consider moving animals:")] 
		public string MoveAnimalEndDate { get; set; }

		[Description("Biomass threshold to move animals INTO paddock (check crop model for units g/m2 or kg/ha):")] 
		public double BiomassThresholdToMoveAnimalsIn { get; set; }

		[Description("Zadok stage threshold below which animals can move INTO paddock (use 0 to ignore):")] 
		public double ZadokThresholdToMoveAnimalsIn { get; set; }

		[Description("Biomass threshold above which animals will move OUT of paddock:")] 
		public double BiomassThresholdToMoveAnimalsOut { get; set; }

		[Description("Zadok stage threshold above which animals will move OUT of paddock (use 0 to ignore):")] 
		public double ZadokThresholdToMoveAnimalsOut { get; set; }

		[Separator("Shearing")]

		[Description("Date to shear animals (dd-mmm)")] 
		public string ShearDate { get; set; }

		[Description(" ")] 
		public string Dummy { get; set; }

		////////////////////////////////////////////////////////////////////////////
		// Callback properties to control disabling of properties.
		////////////////////////////////////////////////////////////////////////////
		public bool BuyingEnabled { get { return Buying; } }

		public bool SellingEnabled { get { return Selling; } }


		////////////////////////////////////////////////////////////////////////////
		// Outputs
		////////////////////////////////////////////////////////////////////////////
		// <summary>Number of animals sold.</summary>
		public int NumberSold { get; set; }

		// <summary>Description of something that has happened.</summary>
		public string EventName { get; set; }

		////////////////////////////////////////////////////////////////////////////
		// Once only setup at start of simulation
		////////////////////////////////////////////////////////////////////////////
        [EventSubscribe("StartOfSimulation")]
        private void OnStartOfSimulation(object sender, EventArgs e)
 		{

 		}

		//////////////////////////////////////////////////////
		// Management that happens every day.
		//////////////////////////////////////////////////////
        [EventSubscribe("DoManagement")]
        private void OnDoManagement(object sender, EventArgs e)
        {
        	EventName = string.Empty;

        	// Buy animals
            if (Buying && DateUtilities.DatesAreEqual(BuyDate, clock.Today))
            {
                var purchase = new StockBuy();
                purchase.Genotype = AnimalType.ToString();   // "small merino"
                purchase.Number = NumAntoBuy;
                purchase.Sex = Sex.ToString();               // "wethers"
                purchase.Age = BuyAge;
                purchase.Weight = BuyWeight;
                purchase.UseTag = tag;
                purchase.Lactating = BuyLactating;
                Animals.Buy(purchase);
                var groupNumberOfBoughtAnimals = Animals.NoGroups;
                Animals.Move(groupNumberOfBoughtAnimals, "Feedlot");
                EventName = NumAntoBuy + " animals bought";
            }

            // Sell animals
            if (Selling)
            {
            	bool doSell = false;
		        if (SellPolicy == SellPolicyType.Date && DateUtilities.DatesAreEqual(SaleDate, clock.Today))
		        	doSell = true;
		        else if (SellPolicy == SellPolicyType.Weight && Animals.WeightAll >= SaleWeight)
	                doSell = true;
	            else if (SellPolicy == SellPolicyType.Age && Animals.AgeMonthsAll >= SaleAge)
                    doSell = true;

                if (doSell)
                {
                    NumberSold = Convert.ToInt32(Animals.NumberAll * SalePercentAnimals / 100.0);
		        	Animals.SellTag(tag, NumberSold);
	              	EventName = NumberSold + " animals sold";
	        	}
            }

        	// Move animals IN to grazing paddock.
            if (!isGrazingCrop && IsMoveAnimalsInConditionMet())
           	{
                for (int g = 1; g <= Animals.NoGroups; g++)
	                Animals.Move(g, PaddockToMoveAnimalsTo.Name);
	            isGrazingCrop = true;
	            EventName = "Animals moved to paddock";
            }

        	// Move animals OUT of grazing paddock.
            else if (isGrazingCrop && IsMoveAnimalsOutConditionMet())
           	{
                for (int g = 1; g <= Animals.NoGroups; g++)
	                Animals.Move(g, "Feedlot");
	            isGrazingCrop = false;
	            EventName = "Animals moved to feedlot";
            }

         	// Shear all animals on specified date
            if (DateUtilities.DatesEqual(ShearDate, clock.Today))
            {
                Animals.Shear(0, "");
	            EventName = "Animals shorn";
            }
        }

        ////////////////////////////////////////////////////////////////////////
		// Condition that determines when animals move IN to paddock for grazing.
		// Return true if animals should be moved.
		////////////////////////////////////////////////////////////////////////
        private bool IsMoveAnimalsInConditionMet()
        {
        	if (clock.Today.DayOfWeek != DayOfWeek.Monday)
        		return false;

        	bool moveAnimals = false;
        	if (MoveAnimalStartDate == null || MoveAnimalEndDate == null ||
            	DateUtilities.WithinDates(MoveAnimalStartDate, clock.Today, MoveAnimalEndDate))
        	{
        		
        		if (plant.AboveGround.Wt > BiomassThresholdToMoveAnimalsIn)
        			moveAnimals = true;
        		if (moveAnimals && ZadokThresholdToMoveAnimalsIn > 0)
        		{
        			double zadok = (double) Apsim.Get(plant as IModel, "Phenology.Zadok.Stage");
        			if (zadok > ZadokThresholdToMoveAnimalsIn)
        				moveAnimals = false;
        		}
	       	}
        	return moveAnimals;
    	}

        ////////////////////////////////////////////////////////////////////////
		// Condition that determines when animals move OUT of paddock for grazing.
		// Return true if animals should be moved.
		////////////////////////////////////////////////////////////////////////
        private bool IsMoveAnimalsOutConditionMet()
        {
    		if ((plant.AboveGround.Wt < BiomassThresholdToMoveAnimalsOut) && (BiomassThresholdToMoveAnimalsOut > 0.0))
    			return true;
    		double zadok = (double) Apsim.Get(plant as IModel, "Phenology.Zadok.Stage");
    	 	if ((zadok > ZadokThresholdToMoveAnimalsOut) && (ZadokThresholdToMoveAnimalsOut > 0.0))
    			return true;
	        return false;
        }
    }
}
```
    Manager ManageSupplement
      SupplementAmount = 50
      SuppType = wheat, crushed
      SupplementThreshold = 500
```csharp
/*--------------------------------------------------------------------------------------------------
Sheep grazing wheat when conditions are suitable, and in feedlot fed supplement the rest of the time.
----------------------------------------------------------------------------------------------------

This manager:
1. Feeds stock supplement at set amount in feedlot only
2. Restocks supplement store when reaches minimum level

--------------------------------------------------------------------------------------------------*/


using System;
using Models.Core;
using Models.PMF;
using Models.Soils;
using Models.Utilities;
using Models.GrazPlan;
using APSIM.Shared.Utilities;

namespace Models
{
	[Serializable]
	public class Script : Model
	{
		[Link] Clock clock;
		[Link] Stock Animals;
		[Link] Supplement Feed;
		[Link] Summary Summary;
		[Link] Plant Wheat;
		[Link] Soil Soil;
		[Link] Zone Paddock;


		private int group_count;
		private int g;

		private string buy_date;
		private string buy_name;
		private double buy_amount;

		[Description("Amount supplement to feed (kg/animal). Supplement fed is as-is (fresh weight) basis.")]
		public double SupplementAmount { get; set; }

		[Description("Supplement type")]
		public string SuppType { get; set; }

		[Description("Minimum amount of supplement in store (kg)")]
		public double SupplementThreshold { get; set; }

		//////////////////////////////////////////////////////
		// Management that happens every day.
		//////////////////////////////////////////////////////

		[EventSubscribe("DoManagement")]
		private void OnDoManagement(object sender, EventArgs e)
		{
			// Feed animals supplement in feedot only
			for (int g = 0; g < Animals.NoGroups; g++)
			{
				// Check if animals are currently in feedlot. If so then offer supplement
				if (string.Compare(Animals.Paddock[g], "Feedlot", true) == 0)   {                                                                
					Feed.Feed(SuppType, SupplementAmount * Animals.NumberAll, "Feedlot");     
				}
			}

			// Stock supplement store
			if (Feed.Stores[1].Stored <= SupplementThreshold)
			{
				Feed.Buy(5000, SuppType);           // Amount (kg) and type of supplement to buy
				Summary.WriteMessage(this, string.Format("Buy supplement: {0:0.00} kg of {1}", 5000, "wheat, crushed"));
			}
		}
	}
}
```
    Zone Paddock: Area=1; Slope=0; AspectAngle=0; Altitude=50
      Fertiliser
      Soil: ASCOrder=Podzolic; SoilType=?; Site=Canberra; NearestTown=Canberra; Region=Gungahlin District; State=Australian Capital Territory; Country=Australia; ApsoilNumber=580-YP; Latitude=-35.201; Longitude=149.082
        DataSource=YP. Ginnenderra Experiment Station (GES). Data provided by James Hunt, based on measurements by John Kirkegaard, characterisation done by Julianne Lilley. Ginnenderra Experiment Station
        Physical
          Thickness  BD    AirDry  LL15   DUL   SAT
          100        1.42  0.04    0.059  0.21  0.408
          100        1.42  0.04    0.064  0.21  0.408
          200        1.48  0.05    0.085  0.21  0.427
          100        1.48  0.06    0.114  0.21  0.427
          200        1.48  0.08    0.13   0.21  0.427
          100        1.48  0.08    0.137  0.21  0.427
          200        1.48  0.09    0.141  0.21  0.427
          300        1.48  0.11    0.15   0.21  0.427
          300        1.48  0.11    0.161  0.21  0.427
          200        1.48  0.11    0.174  0.21  0.427
          200        1.48  0.11    0.174  0.21  0.427
          SoilCrop WheatSoil
            LL=[0.059, 0.064, 0.085, 0.114, 0.13, 0.137, 0.141, 0.15, 0.161, 0.174, 0.174]
            KL=[0.08, 0.08, 0.06, 0.05, 0.04, 0.03, 0.03, 0.02, 0.02, 0.01, 0.01]
            XF=[1, 1, 1, 1, 1, 1, 1, 1, 0.7, 0.4, 0]
        SoilWater: SummerDate=1-Nov; SummerU=6; SummerCona=2; WinterDate=1-Apr; WinterU=2; WinterCona=2; DiffusConst=88; DiffusSlope=35.4; Salb=0.13; CN2Bare=72; CNRed=20; CNCov=0.8; max_pond=0; Thickness=[100, 100, 200, 100, 200, 100, 200, 300, 300, 200, 200]; SWCON=[0.8, 0.8, 0.8, 0.8, 0.8, 0.8, 0.8, 0.8, 0.6, 0.6, 0.6]; PrecipitationInterception=0
        SoilNitrogen: fom_types=[default, manure, mucuna, lablab, shemp, stable]; fract_carb=[0.2, 0.3, 0.54, 0.57, 0.45, 0]; fract_cell=[0.7, 0.3, 0.37, 0.37, 0.47, 0.1]; fract_lign=[0.1, 0.4, 0.09, 0.06, 0.08, 0.9]
          SoilNitrogenNO3 NO3
          SoilNitrogenNH4 NH4
          SoilNitrogenUrea Urea
          SoilNitrogenPlantAvailableNO3 PlantAvailableNO3
          SoilNitrogenPlantAvailableNH4 PlantAvailableNH4
        Organic: FOMCNRatio=80
          Thickness  Carbon  SoilCNRatio  FBiom  FInert  FOM
          100        2.2     10           0.06   0       671.213
          100        0.5     10           0.05   0       577.718
          200        0.3     10           0.03   0.3     427.984
          100        0.2     10           0.02   0.4     368.37
          200        0.2     10           0.02   0.5     272.895
          100        0.15    10           0.01   0.6     234.883
          200        0.15    10           0.01   0.8     174.005
          300        0.1     10           0.01   0.9     110.951
          300        0.08    10           0.01   1       70.7453
          200        0.06    10           0.01   1       52.4094
          200        0.04    10           0.01   1       38.8259
        Chemical
          Thickness  NO3N      NH4N       PH
          100        0.377074  0.0377074  5.1
          100        0.377074  0.0377074  5.1
          200        0.377074  0.0377074  5.3
          100        0.377074  0.0377074  5.3
          200        0.377074  0.0377074  5.9
          100        0.377074  0.0377074  5.9
          200        0.377074  0.0377074  6.4
          300        0.377074  0.0377074  6.4
          300        0.377074  0.0377074  6.8
          200        0.377074  0.0377074  6.8
          200        1         0.2        6.8
        InitialWater: PercentMethod=0; FractionFull=1
        Sample InitialN: Depth=[0-180]; Thickness=[1800]; SWUnits=Volumetric; OCUnits=Total; PHUnits=Water
        CERESSoilTemperature
      SurfaceOrganicMatter: InitialResidueName=wheat_stubble; InitialResidueType=wheat; InitialResidueMass=500; InitialStandingFraction=0; InitialCPR=0; InitialCNR=100; FractionFaecesAdded=0.5
      Plant Wheat: CropType=Wheat; IsEnding=false; DaysAfterEnding=0
      MicroClimate: a_interception=0; b_interception=1; c_interception=0; d_interception=0; soil_albedo=0.3; SoilHeatFluxFraction=0.4; NightInterceptionFraction=0.5; ReferenceHeight=2
      Manager SowingRule
        StartDate = 1-mar
        EndDate = 30-mar
        MinESW = 0
        MinRain = 0
        RainDays = 0
        CultivarName = MacKellar
        SowingDepth = 30
        RowSpacing = 180
        Population = 200
```csharp
using System;
using Models.Core;
using Models.PMF;
using Models.Soils;
using Models.Utilities;
using APSIM.Shared.Utilities;

namespace Models
{
    [Serializable]
    public class Script : Model
    {
        [Link] Clock Clock;
        [Link] Fertiliser Fertiliser;
        [Link] Summary Summary;
        [Link] Plant Wheat;
        [Link] Soil Soil; 
        Accumulator accumulatedRain;
        
        [Description("Start of sowing window (d-mmm)")]
        public string StartDate { get; set;}
        [Description("End of sowing window (d-mmm)")]
        public string EndDate { get; set;}
        [Description("Minimum extractable soil water for sowing (mm)")]
        public double MinESW { get; set;}
        [Description("Accumulated rainfall required for sowing (mm)")]
        public double MinRain { get; set;}
        [Description("Duration of rainfall accumulation (d)")]
        public int RainDays { get; set;}
        [Description("Cultivar to be sown")]
        [Display(Type=DisplayType.CultivarName)]
        public string CultivarName { get; set;}
        [Description("Sowing depth (mm)")]
        public double SowingDepth { get; set;}        
        [Description("Row spacing (mm)")]
        public double RowSpacing { get; set;}    
        [Description("Plant population (/m2)")]
        public double Population { get; set;}    
        
        
        [EventSubscribe("Commencing")]
        private void OnSimulationCommencing(object sender, EventArgs e)
        {
            accumulatedRain = new Accumulator(this, "[Weather].Rain", RainDays);
        }
        

        [EventSubscribe("DoManagement")]
        private void OnDoManagement(object sender, EventArgs e)
        {
            accumulatedRain.Update();
            
            if (DateUtilities.WithinDates(StartDate,Clock.Today,EndDate) &&
                !Wheat.IsAlive &&
                MathUtilities.Sum(Soil.SoilWater.ESW) > MinESW &&
                accumulatedRain.Sum > MinRain)
            {
               Wheat.Sow(population:Population, cultivar:CultivarName, depth:SowingDepth, rowSpacing:RowSpacing);    
            }
        
        }
        
    }
}
```
      Manager SowingFertiliser
        Amount = 130
        CropName = wheat
```csharp
using System;
using Models.Core;
using Models.PMF;
namespace Models
{
    [Serializable]
    public class Script : Model
    {
        [Link] Clock Clock;
        [Link] Fertiliser Fertiliser;
        [Link] Summary Summary;
        
        
        [Description("Amount of fertiliser to be applied (kg/ha)")]
        public double Amount { get; set;}
        
        [Description("Crop to be fertilised")]
        public string CropName { get; set;}
        
        
        

        [EventSubscribe("Sowing")]
        private void OnSowing(object sender, EventArgs e)
        {
            Model crop = sender as Model;
            if (crop.Name.ToLower()==CropName.ToLower())
                Fertiliser.Apply(Amount: Amount, Type: Fertiliser.Types.NO3N);
        }
        
    }
}
```
      Manager Harvest
```csharp
using System;
using Models.Core;
using Models.PMF;
using Models.Soils;
using Models.Utilities;
using APSIM.Shared.Utilities;

namespace Models
{
    [Serializable]
    public class Script : Model
    {
        [Link] Plant Wheat;

        [EventSubscribe("DoManagement")]
        private void OnDoManagement(object sender, EventArgs e)
        {
            if (Wheat.IsReadyForHarvesting)
            {
               Wheat.Harvest();
               Wheat.EndCrop();    
            }
        
        }
        
    }
}
```
    Zone Feedlot: Area=10; Slope=0; AspectAngle=0; Altitude=50
      Soil: ASCOrder=Vertosol; ASCSubOrder=Black; SoilType=Clay; Site=Norwin; NearestTown=Norwin; Region=Darling Downs and Granite Belt; State=Queensland; Country=Australia; NaturalVegetation=Qld. Bluegrass, possible Qld. Blue gum; ApsoilNumber=900; Latitude=-27.581836; Longitude=151.320206; LocationAccuracy=+/- 20m
        DataSource=CSIRO Sustainable Ecosystems, Toowoomba; Characteriesd as part of the GRDC funded project"Doing it better, doing it smarter, managing soil water in Australian agriculture' 2011
        Comments=OC, CLL for all crops estimated-based on Bongeen Mywybilla Soil No1
        Physical
          Thickness  BD       AirDry    LL15      DUL       SAT       KS
          150        1.01056  0.13025   0.2605    0.521     0.588655  20
          150        1.07146  0.198689  0.248362  0.496723  0.565677  20
          300        1.09394  0.28      0.28      0.488438  0.557193  20
          300        1.15861  0.28      0.28      0.480297  0.532787  20
          300        1.17301  0.28      0.28      0.471584  0.527354  20
          300        1.16287  0.28      0.28      0.457071  0.53118   20
          300        1.1875   0.28      0.28      0.452332  0.521888  20
          SoilCrop WheatSoil: LL=[0.261, 0.248, 0.28, 0.306, 0.36, 0.392, 0.446]; KL=[0.06, 0.06, 0.06, 0.04, 0.04, 0.02, 0.01]; XF=[1, 1, 1, 1, 1, 1, 1]
        SoilWater: SummerDate=1-Nov; SummerU=5; SummerCona=5; WinterDate=1-Apr; WinterU=5; WinterCona=5; DiffusConst=40; DiffusSlope=16; Salb=0.12; CN2Bare=73; CNRed=20; CNCov=0.8; max_pond=0; Thickness=[150, 150, 300, 300, 300, 300, 300]; SWCON=[0.3, 0.3, 0.3, 0.3, 0.3, 0.3, 0.3]; PrecipitationInterception=0
        SoilNitrogen: same as WheatSheep.Paddock.Soil.SoilNitrogen
        Organic: FOMCNRatio=40
          Thickness  Carbon  SoilCNRatio  FBiom  FInert  FOM
          150        1.2     12           0.04   0.4     347.129
          150        0.96    12           0.02   0.6     270.344
          300        0.6     12           0.02   0.8     163.972
          300        0.3     12           0.02   1       99.4541
          300        0.18    12           0.01   1       60.322
          300        0.12    12           0.01   1       36.5871
          300        0.12    12           0.01   1       22.1912
        Chemical
          Thickness  NO3N  NH4N  PH
          150        1     0.1   8
          150        1     0.1   8
          300        1     0.1   8
          300        1     0.1   8
          300        1     0.1   8
          300        1     0.1   8
          300        1     0.1   8
        InitialWater: PercentMethod=1; FractionFull=1
        Sample InitialN: Thickness=[150, 150, 300, 300, 300, 300, 300]; SWUnits=Volumetric; OCUnits=Total; PHUnits=Water
        CERESSoilTemperature
      SurfaceOrganicMatter: InitialResidueName=wheat_stubble; InitialResidueType=wheat; InitialResidueMass=0; InitialStandingFraction=0; InitialCPR=0; InitialCNR=100; FractionFaecesAdded=0.5
      MicroClimate: a_interception=0; b_interception=1; c_interception=0; d_interception=0; soil_albedo=0.3; SoilHeatFluxFraction=0.4; NightInterceptionFraction=0.5; ReferenceHeight=2
    Zone PaddockNotGrazed: same as WheatSheep.Paddock
  DataStore
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