Simulations: Version=68
  Simulation SimpleRotation
    Memo
      (next script add more complexity to animal trading)
    Clock: Start=2001-10-01; End=2003-09-30
    Summary SummaryFile
    SoilArbitrator
    Weather: FileName=%root%\Examples\WeatherFiles\lincoln.met
    Stock: RandSeed=9999
      PaddockList:
        {Area=1, Slope=0}
    Supplement: SpoilageTime=0
      Stores:
        Name                Stored  IsRoughage  DMContent  DMD   MEContent  CPConc  ProtDg  PConc   SConc   EEConc  ADIP2CP  AshAlk  MaxPassage
        fodder              0       true        0.85       0     0          0       0       0       0       0       0        0       0
        silage_highquality  0       true        1          0.85  12         0.16    0.7     0.0032  0.0024  0.02    0.06     0.6     0
    Manager TargetRotationLength
      DoVerbose = False
      StockingRate = 10
      CurrentLocationName = Paddock00
      TargetRotationLength = 10
      PostGrazingResidual = 2800
      PostCuttingResidual = 1800
      HarvestExcessHerbage = True
      SilageEveryDay = 0.25
      SilageOnPastureMass = 15
      TriggerPastureMass = 2000
      NumCows = 3
      pastLocationName =
      newLocationName =
      CurrentLocationNum = 0
      NumPaddocks = 0
      listOfPaddockInfo =
```csharp
using System;
using Models.Core;
using Models.Utilities;
using Models.GrazPlan;
using APSIM.Shared.Utilities;
using System.Xml.Serialization;
using Models.PMF;
using Models.Soils;
using System.Collections;
using System.Collections.Generic;
using Models.AgPasture;
using System.Diagnostics;

namespace Models
{

    [Serializable]
    public class Script : Model
    {
        [Link] Clock Clock;
        [Link] Stock Cows;
        [Link] Supplement Supplement;
        [Link] Zone[] Paddocks;
        [Link] ISummary summary = null;
        [Link] Simulation Farm;

        //List<AgPasture.PastureSpecies> Pasture = new List<AgPasture.PastureSpecies>();

        [Serializable]
        public class PaddockInfo
        {
            public string paddockName;
            public double totalBiomass;
            public double harvestableBiomass;
            public int paddockNum;
            public double paddockArea;
        }

        [Description("Do verbose reporting from this script (tick for yes): ")] 
        public bool DoVerbose { get; set; }

        [Separator("Whole farm and initial location")]

        [Description("Whole-farm stocking rate (head/ha): ")] 
        public double StockingRate { get; set; } 

        [Description("Initial location of the cows (paddock name): ")] 
        public string CurrentLocationName { get; set; }

        [Separator("Settings for the rotation")]

        [Description("Target rotation length (days/paddock): ")] 
        public int TargetRotationLength { get; set; }

        [Description("Post-grazing residual to trigger pasture conservation (kgDM/ha): ")] 
        public double PostGrazingResidual { get; set; }

        [Description("Post-cutting residual (kgDM/ha): ")] 
        public double PostCuttingResidual { get; set; }

        [Description("Harvest excess herbage above residual when cows leave the paddock?: ")] 
        public bool HarvestExcessHerbage { get; set; }

        [Separator("Settings for supplementary feeding")]

        [Description("Baseline (i.e. every day) feeding of silage (kgDM/head/day): ")] 
        public double SilageEveryDay { get; set; }

        [Description("Low pre-grazing pasture mass feeding (additional to baseline) of silage (kgDM/head/day): ")] 
        public double SilageOnPastureMass { get; set; }

        [Description("Trigger pre-grazing pasture mass for the rule above (kgDM/ha): ")] 
        public double TriggerPastureMass { get; set; }

        public int NumCows { get; set; } // number of cows on the whole farm
        public string pastLocationName { get; set; }  // name of the paddock that the cows are currently in
        public string newLocationName { get; set; }  // name of the paddock that the cows are currently in
        public int CurrentLocationNum { get; set; }  // name of the paddock that the cows are currently in
        public int NumPaddocks { get; set; }
        //public double[] HarvestableBiomass { get; set; }

        private int group_count; // how many groups are there in the simulation
        private int g = 1;      // index to the groups of animals

        //private int DaysPerPaddock;
        private int DaysInThisPaddock;
        private bool MoveToday = false;

        public event BiomassRemovedDelegate BiomassRemoved;
        public List<PaddockInfo> listOfPaddockInfo { get; set; }


        [EventSubscribe("StartOfSimulation")]
        private void OnStartOfSimulation(object sender, EventArgs e)
        {
            summary.WriteMessage(this, "Initialising the paddock information");
            listOfPaddockInfo = new List<PaddockInfo>();


            GetPaddockInfo();
            //HarvestableBiomass = Farm.

            NumCows = (int)(Math.Round(StockingRate * Farm.Area, 0));

            SetInitialCowStuff();

            if (NumCows > 0)
                Cows.Move(g, CurrentLocationName);

            summary.WriteMessage(this, "     The number of animals has been rounded to " + NumCows + " from " + (StockingRate * Farm.Area));
            summary.WriteMessage(this, "     The animals will begin in " + CurrentLocationName + " which is paddock number " + CurrentLocationNum + " in the simulation");
            summary.WriteMessage(this, "     The area of the whole farm is " + Farm.Area + " ha");

            DaysInThisPaddock = -1;
        }

        [EventSubscribe("DoManagement")]
        private void OnDoManagement(object sender, EventArgs e)
        {
            UpdatePaddockInfo();

            if ((Cows.LactatingAll > 2) && (Cows.NoSucklingAll > 0))
            	WeanCalves();
            if ((Cows.LactatingAll > 4) && (Cows.LactatingAll < 6))
            	SellCalves();

            MoveToday = false;
            // how many days in this paddock?  Ready to move?
            DaysInThisPaddock += 1;
            if (DaysInThisPaddock >= TargetRotationLength)
            {
                MoveToday = true;

                pastLocationName = CurrentLocationName;
                if (CurrentLocationNum < NumPaddocks - 1)
                {
                    CurrentLocationNum += 1;
                    newLocationName = listOfPaddockInfo[CurrentLocationNum].paddockName;
                }
                else
                {
                    CurrentLocationNum = 0;
                    newLocationName = listOfPaddockInfo[CurrentLocationNum].paddockName;
                }
                CurrentLocationName = listOfPaddockInfo[CurrentLocationNum].paddockName;


                if (HarvestExcessHerbage)
                {
                    foreach (Zone paddock in Paddocks)
                    {
                        if (paddock.Name == pastLocationName)
                        {
                            double pastPaddockBiomass = 0.0;
                            foreach (PastureSpecies plant in Apsim.Children(paddock, typeof(PastureSpecies)))
                                pastPaddockBiomass += plant.AboveGroundWt;
                            if (pastPaddockBiomass > PostGrazingResidual)  //why the 250? Because don't harvest very small amounts ...
                            {
                                foreach (PastureSpecies plant in Apsim.Children(paddock, typeof(PastureSpecies)))
                                    plant.Graze(amount: (plant.AboveGroundWt / pastPaddockBiomass * PostCuttingResidual), type: "SetResidueAmount");  

                            }
                        }
                    }
                }

                if (NumCows > 0)
                    Cows.Move(g, listOfPaddockInfo[CurrentLocationNum].paddockName);

                if (DoVerbose)
                    summary.WriteMessage(this, "moving Stock to " + listOfPaddockInfo[CurrentLocationNum].paddockName);

                DaysInThisPaddock = 0;
            }

            if (SilageEveryDay > 0)
            {
            // see how much supplement there is - buy more if needed
            // Stores 1 is from a pasture component so bought supplements start at 2
            	double silageOnHand = Supplement.Stores[2 - 1].Stored;
            	if (silageOnHand < SilageEveryDay * Cows.NumberAll)
            	{
            		Supplement.Buy(SilageEveryDay * 180 * Cows.NumberAll, "silage_highquality");  // i.e. 6 months worth
            		summary.WriteMessage(this, "SilageEveryDay: Buying silage_highquality of total amount : " + (SilageEveryDay * 180 * Cows.NumberAll) + " kg DM");
            	}
                Supplement.Feed("silage_highquality", SilageEveryDay * Cows.NumberAll, CurrentLocationName, true);
            }

            if ((SilageOnPastureMass > 0) && (listOfPaddockInfo[CurrentLocationNum].harvestableBiomass < TriggerPastureMass))
            {
            	double silageOnHand = Supplement.Stores[2 - 1].Stored;
            	if (silageOnHand < SilageOnPastureMass * Cows.NumberAll)
            	{
            		Supplement.Buy(SilageOnPastureMass * 180 * Cows.NumberAll, "silage_highquality");
            		summary.WriteMessage(this, "SilageOnPastureMass: Buying silage_highquality of total amount : " + (SilageOnPastureMass * 180 * Cows.NumberAll) + " kg DM");
            	}
                Supplement.Feed("silage_highquality", SilageOnPastureMass * Cows.NumberAll, CurrentLocationName, true);
            }


        } // End of Do Management

        [EventSubscribe("DoManagementCalculations")]
        private void DoManagementCalculations(object sender, EventArgs e)
        {
            //this is after Stock have eaten
            UpdatePaddockInfo();


        }

        public void SetInitialCowStuff()
        {
            if (NumCows > 0)
            {
                g = Cows.NoGroups + 1;

                StockBuy purchase = new StockBuy();
                purchase.Genotype = "Angus";
                purchase.Number = NumCows;
                purchase.Sex = "steers";
                purchase.Age = 36;       // age in months
                purchase.Weight = 600.0;  // live weight in kg
                purchase.UseTag = g + 1;
                purchase.MatedTo = "Angus";
                purchase.Pregnant = 0;  // days pregnant, 0 = non pregnant, 1 = pregnant
                purchase.Lactating = 0;  // 0 for dry, 1 for lactating
                purchase.NumYoung = 0;
                purchase.YoungWt = 0;

                Cows.Buy(purchase);
            }
        }

        public void WeanCalves()
        {
                StockWean weanData = new StockWean();
				weanData.Group = 0;
				weanData.Sex = "all";
				weanData.Number = Cows.NumberAll;

				Cows.Wean(weanData);
        }

        public void SellCalves()
        {
				double weanAge = 0.25 * 365;
				int NumGroups = Cows.NoGroups;

			  for (int gg = 1; gg <= NumGroups; gg++)
              {
                  StockSplit split = new StockSplit();
                  split.Group = gg;
                  split.Type = "age";
                  split.Value = weanAge;  

                Cows.Split(split);
              }

              NumGroups = Cows.NoGroups;
              for (int gg = 1; gg <= NumGroups; gg++)
              {
                if (Cows.Age[gg - 1] < weanAge)
                      Cows.Sell(gg, Cows.Number[gg - 1]);
              }


        }


        public void GetPaddockInfo()
        {
            NumPaddocks = 0;
            CurrentLocationNum = 0;

            foreach (Zone paddock in Paddocks)
            {
                NumPaddocks += 1;

                PaddockInfo paddockInfo = new PaddockInfo();

                paddockInfo.paddockName = paddock.Name;
                paddockInfo.paddockNum = NumPaddocks - 1;
                paddockInfo.paddockArea = paddock.Area;

                foreach (PastureSpecies plant in Apsim.Children(paddock, typeof(PastureSpecies)))
                {
                    paddockInfo.harvestableBiomass += plant.HarvestableWt;
                    paddockInfo.totalBiomass += plant.AboveGroundWt;
                }


                listOfPaddockInfo.Add(paddockInfo);

                if (paddock.Name == CurrentLocationName)
                    CurrentLocationNum = paddockInfo.paddockNum;

                summary.WriteMessage(this, "     Paddock " + NumPaddocks + " is called " + paddock.Name + ", has an area of " + paddock.Area + " ha and an initial harvestable biomass of " + paddockInfo.harvestableBiomass + " kg DM / ha");

            }

        }

        public void UpdatePaddockInfo()
        {
            int ii = -1;

            foreach (Zone paddock in Paddocks)
            {
                ii += 1;
                listOfPaddockInfo[ii].harvestableBiomass = 0.0;
                foreach (PastureSpecies plant in Apsim.Children(paddock, typeof(PastureSpecies)))
                {
                    listOfPaddockInfo[ii].harvestableBiomass += plant.HarvestableWt;
                    listOfPaddockInfo[ii].totalBiomass += plant.AboveGroundWt;
                }

            }

        }


    }
}
```
    Report ReportFarm: EventNames=[Clock].EndOfDay
      VariableNames:
        [Clock].Today
        [TargetRotationLength].Script.listOfPaddockInfo[1].harvestableBiomass as PaddockInfo
        [TargetRotationLength].Script.CurrentLocation as CurrentLoc
        [TargetRotationLength].Script.CurrentLocationNum as CurrentLocNum
        [Stock].PastIntakeAll.Weight as IntakePast
        [Stock].SuppIntakeAll.Weight as IntakeSupp
        [Stock].IntakeAll.Weight as IntakePastSupp
        [Stock].Paddock as StockInPaddockName
        [TargetRotationLength].Script.CurrentLocationNum as StockInPaddockNum
        [Stock].NumberAll
        [Stock].BaseWtAll
        [Stock].CondScoreAll
        [Stock].IntakeAll.Weight * [Stock].NumberAll as TotalIntake
        ([Paddock00].AGPRyegrass.HerbageGrowthWt + [Paddock00].AGPWhiteClover.HerbageGrowthWt) * [Paddock00].Area + ([Paddock01].AGPRyegrass.HerbageGrowthWt + [Paddock01].AGPWhiteClover.HerbageGrowthWt) * [Paddock01].Area + ([Paddock02].AGPRyegrass.HerbageGrowthWt + [Paddock02].AGPWhiteClover.HerbageGrowthWt) * [Paddock02].Area as TotalGrowth
        [Supplement].Stores[2].Stored
    Zone Paddock00: Area=10; Slope=0; AspectAngle=0; Altitude=50
      Folder Managers
        Manager AutomaticFertiliser
          AllowFertiliser = yes
          Depth2SoilN = 500
          CriticalSoilN = 5
          FertNAmount = 25
          FertType = UreaN
          FertApplicationDepth = 1
          FertMinimumDays = 15
```csharp
using Models.Interfaces;
using System.Xml.Serialization;
using APSIM.Shared.Utilities;
using Models.Soils;
using Models.PMF;
using Models.Core;
using System;

namespace Models
{
    [Serializable]
    public class Script : Model
    {
        [Link] private Clock Clock;
        [Link] private Fertiliser fertiliser;
        [Link] private ISummary summary;
        [Link] private Soil Soil;
        private DateTime lastApplicationDate;
        private bool fertiliserIsAllowed;
        private int nLayers;
        [ScopedLinkByName]
        private ISolute NO3;
        [ScopedLinkByName]
        private ISolute NH4;
        [ScopedLinkByName]
        private ISolute Urea;

        //User inputs from properties tab
        [Description("Turn ferliser applications on? ")]
        public yesnoType AllowFertiliser { get; set; }
        
        [Description("Depth to calculate available soil N (mm): ")]
        public double Depth2SoilN { get; set; }

        [Description("Minimum available N, triggers an application (kgN/ha): ")]
        public double CriticalSoilN { get; set; }

        [Description("Amount of N fertiliser for each application (kgN/ha): ")]
        public double FertNAmount { get; set; }

        [Description("Type of N fertiliser to apply: ")]
        public Fertiliser.Types FertType { get; set; }

        [Description("Depth at which to apply the fertiliser (mm): ")]
        public double FertApplicationDepth { get; set; }
       
        [Description("Minimum period between applications (days): ")]
        public double FertMinimumDays { get; set; }
       
        public enum yesnoType
        {
            /// <summary>a positive answer</summary>
            yes,
            /// <summary>a negative answer</summary>
            no
        }

        [XmlIgnore] public double TopMineralN { get; set; }
        

        [EventSubscribe("StartOfSimulation")]
        private void OnStartOfSimulation(object sender, EventArgs e)
        {
            fertiliserIsAllowed = (AllowFertiliser == yesnoType.yes);
            nLayers = Soil.Thickness.Length;
        }

        [EventSubscribe("DoManagement")]
        private void OnDoManagement(object sender, EventArgs e)
        {
            double daysSinceLastApplication = (Clock.Today - lastApplicationDate).TotalDays;
            
            // get the N stored in the soil
            double depthFromSurface = 0.0;
            double fracLayer = 0.0;
            TopMineralN = 0.0;
            for (int layer = 0; layer < nLayers; layer++)
            {
                fracLayer = Math.Min(1.0, (Depth2SoilN - depthFromSurface) / Soil.Thickness[layer]);
                TopMineralN += (NO3.kgha[layer]
                + NH4.kgha[layer]
                + Urea.kgha[layer])
                * fracLayer;
                depthFromSurface += Soil.Thickness[layer];
                if (depthFromSurface >= Depth2SoilN)
                    layer = nLayers;
            }

            if (fertiliserIsAllowed && (daysSinceLastApplication >= FertMinimumDays) && (TopMineralN <= CriticalSoilN))
            {
                fertiliser.Apply(FertNAmount, FertType, FertApplicationDepth);
                lastApplicationDate = Clock.Today;
            }
        }
    }
}
```
        Manager AutomaticIrrigation
          allowIrrigation = True
          seasonStart = 15-Aug
          seasonEnd = 30-May
          seasonsAllocation = 10000
          triggerDeficit = 75
          targetDeficit = 99
          returndays = 1
          maximumAmount = 30
          depthPAWC = 300
```csharp
using System;
using Models.Core;
using Models.PMF;
using Models.Soils;
using System.Xml.Serialization;
using Models.PMF;
using APSIM.Shared.Utilities;

        
namespace Models
{
    [Serializable] 
    [System.Xml.Serialization.XmlInclude(typeof(Model))]
    public class Script : Model
    {
        //Communication to other modules
        [Link] ISummary summary = null;
        [Link] Irrigation Irrigation;
        [Link] Clock Clock;
        [Link] Soil Soil;
        [Link(IsOptional = true)] IPlant existingCrop;
       
        //User inputs from properties tab
        [Description("Turn irrigation on?")]
        public bool allowIrrigation { get; set; }
        [Description("Start of irrigation season (dd-MMM)")]
        public string seasonStart { get; set; }
        [Description("End of irrigation season (dd-MMM)")]
        public string seasonEnd { get; set; }
        [Description("Season allocation (mm)")]
        public double seasonsAllocation { get; set; }
        [Description("Deficit to trigger irrigation (% PAWC)")]
        public double triggerDeficit { get; set; }
        [Description("Deficit to stop irrigaton (% PAWC)")]
        public double targetDeficit { get; set; }
        [Description("Minimum days for irrigation to return")]
        public double returndays { get; set; }
        [Description("Maximum irrigation application (mm/day)")]
        public double maximumAmount { get; set; }
        [Description("Depth to calculate PAWC (mm)")]
        public double depthPAWC { get; set; }

        //Class members
        [XmlIgnore] public double TopSWdeficit { get; set; }
        [XmlIgnore] public double TopSWC { get; set; }
        [XmlIgnore] public double DaysSinceIrrigation { get; set; }
        [XmlIgnore] public double AmountToApply { get; set; }
        [XmlIgnore] public double SeasonAppliedAmount { get; set; }
        
        private bool IrrigationIsAllowed { get; set; }
        private bool SeasonIsOpen { get; set; }
        private bool CropIsActive { get; set; }
        private bool IrrigatorIsAvailable { get; set; }
        private bool SoilIsDry { get; set; }

        private DateTime StartDate;
        private DateTime EndDate;
        private double TopDUL;
        private double TopLL;
        private int nLayers;
    
        //Calculate static soil variables
        [EventSubscribe("StartOfSimulation")]
        private void OnStartOfSimulation(object sender, EventArgs e)
        {   
            //Set the season dates
            StartDate = DateTime.Parse(seasonStart + "-" + Clock.Today.Year.ToString());
            EndDate = DateTime.Parse(seasonEnd + "-" + Clock.Today.Year.ToString());
            
            //Can we irrigate at all?
            IrrigationIsAllowed = false; 
            if (allowIrrigation)
                IrrigationIsAllowed = true; 

            //Calculate soil water variables
            double depthFromSurface = 0.0;
            double fracLayer = 0.0;
            nLayers = Soil.Thickness.Length;
            for (int layer = 0; layer < nLayers; layer++)
            {
                fracLayer = Math.Min(1.0, (depthPAWC - depthFromSurface) / Soil.Thickness[layer]);
                TopLL += Soil.LL15mm[layer] * fracLayer;
                TopDUL += Soil.DULmm[layer] * fracLayer;
                depthFromSurface += Soil.Thickness[layer];
                if (depthFromSurface >= depthPAWC)
                    layer = nLayers;
            }
        }
             
        //Determine daily requirement for irrigation
        [EventSubscribe("StartOfDay")]
        private void OnStartOfDay(object sender, EventArgs e)
        {
            //Can we irrigate today?          
            SeasonIsOpen = isBetween(Clock.Today, StartDate, EndDate);

            //Is there a crop in the ground that needs irrigation?
            CropIsActive = false;
            if ((existingCrop != null) && (existingCrop.IsAlive))
                CropIsActive = true;
            //if ((existingCrop.Phenology.Stage >= 3.0) && (existingCrop.Phenology.Stage < 6.0))
          
            //Is the irrigator available?
            IrrigatorIsAvailable = false;
            DaysSinceIrrigation += 1;
            if (DaysSinceIrrigation >= returndays)
                IrrigatorIsAvailable = true;
          
            //Is the soil dry enough to require irrigation?
            SoilIsDry = false;
            double depthFromSurface = 0.0;
            double fracLayer = 0.0;
            TopSWC = 0.0;
            for (int layer = 0; layer < nLayers; layer++)
            //for (int layer = 0; depthFromSurface < depthPAWC + Soil.Thickness[layer]; layer++)
            {
                fracLayer = Math.Min(1.0, (depthPAWC - depthFromSurface) / Soil.Thickness[layer]);
                TopSWC += Soil.SoilWater.SWmm[layer] * fracLayer;
                depthFromSurface += Soil.Thickness[layer];
                if (depthFromSurface >= depthPAWC)
                    layer = nLayers;
            }
            
            TopSWdeficit = TopSWC - TopDUL;
            if (Math.Max(0.0, -TopSWdeficit) >= (TopDUL - TopLL) * (100 - triggerDeficit) / 100)
                SoilIsDry = true;
                
            //Are all the conditions ratifying irrigation
            if (IrrigationIsAllowed && SeasonIsOpen && CropIsActive && IrrigatorIsAvailable && SoilIsDry)
            {
                //Lets bloody well irrigate then!!!!
                AmountToApply = TopDUL * targetDeficit / 100 - TopSWC;
                AmountToApply = Math.Max(0.0, Math.Min(AmountToApply, seasonsAllocation - SeasonAppliedAmount));
                Irrigation.Apply(AmountToApply);
                DaysSinceIrrigation = 0;
                SeasonAppliedAmount += AmountToApply;
            }
        }
        
        ///Checks whether theDate is between iniDate and endDate (non-year specific)
        private bool isBetween(DateTime theDay, DateTime iniDate, DateTime endDate)
        {
            bool result = false;
            if (iniDate.DayOfYear < endDate.DayOfYear)
            {
                // period is within one year, ex: summer in the northern hemisphere
                if ((theDay.DayOfYear >= iniDate.DayOfYear) && (theDay.DayOfYear <= endDate.DayOfYear))
                    result = true;
            }
            else
            {
                // period goes over the end of the year, ex: summer in the southern hemisphere
                if ((theDay.DayOfYear >= iniDate.DayOfYear) || (theDay.DayOfYear <= endDate.DayOfYear))
                    result = true;
            }
            
            return result;
        }
    }
}
```
      MicroClimate: a_interception=0; b_interception=0; c_interception=0; d_interception=0; soil_albedo=0.23; SoilHeatFluxFraction=0.4; NightInterceptionFraction=0.5; ReferenceHeight=2
      Irrigation
      Fertiliser
      SurfaceOrganicMatter: InitialResidueName=Sward; InitialResidueType=grass; InitialResidueMass=1000; InitialStandingFraction=0; InitialCPR=0; InitialCNR=15; FractionFaecesAdded=0.5
      PastureSpecies AGPRyegrass: MaximumNUptake=10; Albedo=0.26; Gsmax=0.011; R50=200; InitialShootDM=1500; InitialRootDM=450; InitialRootDepth=750; ReferencePhotosyntheticRate=1; LightExtinctionCoefficient=0.5; GrowthTminimum=1; GrowthToptimum=20; GrowthTEffectExponent=1.7; HeatOnsetTemperature=28; HeatFullTemperature=35; HeatRecoverySumDD=30; HeatRecoveryTReference=25; ColdOnsetTemperature=1; ColdFullTemperature=-5; ColdRecoverySumDD=25; MaintenanceRespirationCoefficient=0.03; GrowthRespirationCoefficient=0.25; RespirationTReference=20; RespirationExponent=1.5; NThresholdsForLeaves=[0.04, 0.012, 0.05]; NThresholdsForStems=[0.02, 0.006, 0.025]; NThresholdsForStolons=[0, 0, 0]; NThresholdsForRoots=[0.02, 0.006, 0.025]; DegreesDayForGermination=125; TargetShootRootRatio=4; MaxRootAllocation=0.25; ShootRootGlfFactor=0.5; ReproSeasonReferenceLatitude=41; ReproSeasonTimingCoeff=0.14; ReproSeasonMaxAllocationIncrease=0.5; ReproSeasonAllocationCoeff=0.1; FractionLeafMaximum=0.7; FractionLeafMinimum=0.7; FractionLeafDMThreshold=500; FractionLeafDMFactor=2000; FractionLeafExponent=3; SpecificLeafArea=20; SpecificRootLength=100; ShootMaxEffectOnLAI=1000; MaxStemEffectOnLAI=1; LiveLeavesPerTiller=3; TissueTurnoverRateShoot=0.05; TissueTurnoverRateRoot=0.02; DetachmentRateShoot=0.08; TurnoverTemperatureMin=2; TurnoverTemperatureRef=20; TurnoverTemperatureExponent=1; TurnoverDroughtEffectMax=1; TurnoverDroughtThreshold=0.5; TurnoverDefoliationCoefficient=0.5; TurnoverDefoliationRootEffect=0.1; FractionNLuxuryRemobilisable=[0.1, 0.1, 0.1]; SoilSaturationEffectMax=0.1; MinimumWaterFreePorosity=-1; SoilSaturationRecoveryFactor=0.25; NDillutionCoefficient=0.25; GlfGeneric=1; GlfSoilFertility=1; PlantHeightMinimum=300; PlantHeightMaximum=300; PlantHeightMassForMax=10000; PlantHeightExponent=2.8; RootDepthMinimum=50; RootDepthMaximum=1000; RootElongationRate=25; RootDistributionDepthParam=250; RootDistributionExponent=3.2; DigestibilitiesCellWall=[0.9, 0.7, 0.6, 0.2]; MinimumGreenWt=100; PreferenceForGreenOverDead=1; PreferenceForLeafOverStems=1
        zero: SpeciesFamily, PhotosyntheticPathway, UseHeatStressFactor, UseColdStressFactor, ColdRecoveryTReference, UseReproSeasonFactor, FractionToStolon, StolonEffectOnLAI, MinimumNFixation, MaximumNFixation, FractionStolonStanding, WaterAvailableMethod, NitrogenAvailableMethod
      PastureSpecies AGPWhiteClover: MaximumNUptake=10; Albedo=0.26; Gsmax=0.011; R50=200; SpeciesFamily=1; PhotosyntheticPathway=0; InitialShootDM=500; InitialRootDM=150; InitialRootDepth=350; ReferencePhotosyntheticRate=1; LightExtinctionCoefficient=0.8; GrowthTminimum=2; GrowthToptimum=22; GrowthTEffectExponent=1.7; UseHeatStressFactor=0; HeatOnsetTemperature=30; HeatFullTemperature=36; HeatRecoverySumDD=20; HeatRecoveryTReference=25; UseColdStressFactor=0; ColdOnsetTemperature=2; ColdFullTemperature=-5; ColdRecoverySumDD=20; ColdRecoveryTReference=0; MaintenanceRespirationCoefficient=0.04; GrowthRespirationCoefficient=0.25; RespirationTReference=20; RespirationExponent=1.5; NThresholdsForLeaves=[0.045, 0.02, 0.055]; NThresholdsForStems=[0.0225, 0.01, 0.0275]; NThresholdsForStolons=[0.0225, 0.01, 0.0275]; NThresholdsForRoots=[0.0225, 0.01, 0.0275]; DegreesDayForGermination=125; TargetShootRootRatio=4; MaxRootAllocation=0.25; ShootRootGlfFactor=0.5; UseReproSeasonFactor=0; ReproSeasonReferenceLatitude=41; ReproSeasonTimingCoeff=0.14; ReproSeasonMaxAllocationIncrease=0.5; ReproSeasonAllocationCoeff=0.1; FractionLeafMaximum=0.56; FractionLeafMinimum=0.28; FractionLeafDMThreshold=500; FractionLeafDMFactor=2000; FractionLeafExponent=3; FractionToStolon=0.2; SpecificLeafArea=32; SpecificRootLength=45; StolonEffectOnLAI=0.3; ShootMaxEffectOnLAI=500; MaxStemEffectOnLAI=0.5; LiveLeavesPerTiller=3; TissueTurnoverRateShoot=0.05; TissueTurnoverRateRoot=0.02; DetachmentRateShoot=0.11; TurnoverTemperatureMin=2; TurnoverTemperatureRef=20; TurnoverTemperatureExponent=1; TurnoverDroughtEffectMax=1; TurnoverDroughtThreshold=0.5; TurnoverDefoliationCoefficient=0.5; TurnoverDefoliationRootEffect=0.1; FractionNLuxuryRemobilisable=[0.1, 0.1, 0.1]; MinimumNFixation=0.2; MaximumNFixation=0.6; SoilSaturationEffectMax=0.1; MinimumWaterFreePorosity=-1; SoilSaturationRecoveryFactor=0.25; NDillutionCoefficient=1; GlfGeneric=1; GlfSoilFertility=1; PlantHeightMinimum=300; PlantHeightMaximum=300; PlantHeightMassForMax=7500; PlantHeightExponent=2.5; RootDepthMinimum=30; RootDepthMaximum=350; RootElongationRate=25; RootDistributionDepthParam=70; RootDistributionExponent=2.5; DigestibilitiesCellWall=[0.9, 0.8, 0.7, 0.2]; MinimumGreenWt=50; FractionStolonStanding=0; PreferenceForGreenOverDead=1; PreferenceForLeafOverStems=1; WaterAvailableMethod=0; NitrogenAvailableMethod=0
      Soil LismoreSoil: SoilType=NZ_Sedimentary; LocalName=Lismore; Site=Winchmore; NearestTown=Ashburton; Region=Canterbury; Country=New Zealand; Latitude=-48.48; Longitude=0
        Chemical
          Thickness  NO3N  NH4N  PH
          150        5     0.1   6
          150        2.5   0.1   6
          200        1     0.1   6
          150        0.75  0.1   6
          250        0.5   0.1   6
          300        0.5   0.1   6
          300        0.5   0.1   6
        Physical
          Thickness  ParticleSizeClay  BD    AirDry  LL15   DUL    SAT   KS
          150        20                1.3   0.05    0.15   0.36   0.45  5000
          150        15                1.35  0.12    0.14   0.34   0.43  2500
          200        12                1     0.055   0.055  0.19   0.25  3000
          150        8                 0.53  0.015   0.015  0.065  0.15  10000
          250        6                 0.31  0.01    0.01   0.04   0.11  17500
          300        5                 0.3   0.01    0.01   0.03   0.11  20000
          300        5                 0.3   0.01    0.01   0.03   0.11  20000
          SoilCrop AGPRyegrassSoil: LL=[0.15, 0.14, 0.06, 0.02, 0.01, 0.01, 0.01]; KL=[0.1, 0.1, 0.08, 0.04, 0.01, 0, 0]; XF=[1, 1, 1, 1, 1, 0, 0]
          SoilCrop AGPWhiteCloverSoil: LL=[0.15, 0.14, 0.06, 0.02, 0.01, 0.01, 0.01]; KL=[0.1, 0.1, 0.08, 0.04, 0.01, 0, 0]; XF=[1, 1, 1, 1, 1, 0, 0]
          SoilCrop Ryegrass1Soil: LL=[0.15, 0.14, 0.06, 0.02, 0.01, 0.01, 0.01]; KL=[0.1, 0.1, 0.08, 0.04, 0.01, 0, 0]; XF=[1, 1, 1, 1, 1, 0, 0]
        SoilWater: SummerDate=1-Nov; SummerU=6; SummerCona=3.5; WinterDate=1-apr; WinterU=2; WinterCona=2; DiffusConst=88; DiffusSlope=35; Salb=0.13; CN2Bare=73; CNRed=20; CNCov=0.8; slope=0; discharge_width=0; catchment_area=0; max_pond=0; PrecipitationInterception=0
          Thickness  SWCON  KLAT
          150        0.5    0
          150        0.52   0
          200        0.55   0
          150        0.6    0
          250        0.65   0
          300        0.65   0
          300        0.65   0
        SoilNitrogen: fom_types=[default, manure, mucuna, lablab, shemp, stable]; fract_carb=[0.2, 0.3, 0.54, 0.57, 0.45, 0]; fract_cell=[0.7, 0.3, 0.37, 0.37, 0.47, 0.1]; fract_lign=[0.1, 0.4, 0.09, 0.06, 0.08, 0.9]
          SoilNitrogenNO3 NO3
          SoilNitrogenNH4 NH4
          SoilNitrogenUrea Urea
          SoilNitrogenPlantAvailableNO3 PlantAvailableNO3
          SoilNitrogenPlantAvailableNH4 PlantAvailableNH4
        Organic: FOMCNRatio=40
          Thickness  Carbon  SoilCNRatio  FBiom  FInert  FOM
          150        3       12           0.04   0.5     331.337
          150        1       12           0.02   0.7     245.461
          200        0.6     12           0.02   0.83    164.537
          150        0.4     12           0.01   0.9     121.892
          250        0.25    12           0.01   0.95    73.9313
          300        0.15    12           0      0.99    40.5743
          300        0.1     12           0      0.99    22.2677
        InitialWater Initial water: PercentMethod=1; FractionFull=0.95
        Sample Initial nitrogen: Thickness=[150, 150, 200, 150, 250, 300, 300]; SWUnits=Volumetric; OCUnits=Total; PHUnits=Water
        CERESSoilTemperature
      Report: EventNames=[Clock].EndOfDay
        VariableNames:
          [Clock].Today
          [AGPRyegrass].AboveGroundWt
          [AGPRyegrass].HarvestableWt
          [AGPWhiteClover].AboveGroundWt
          [AGPWhiteClover].HarvestableWt
          [AGPRyegrass].AboveGroundWt + [AGPWhiteClover].AboveGroundWt as PaddockBiomass
          [AGPRyegrass].HerbageGrowthWt + [AGPWhiteClover].HerbageGrowthWt as PGR
          ([AGPRyegrass].HerbageGrowthWt + [AGPWhiteClover].HerbageGrowthWt) * [Zone].Area as PaddockFeedAccum
    Zone Paddock01: same as SimpleRotation.Paddock00
    Zone Paddock02: Area=10; Slope=0; AspectAngle=0; Altitude=50
      Folder Managers: same as SimpleRotation.Paddock00.Managers
      MicroClimate: a_interception=0; b_interception=0; c_interception=0; d_interception=0; soil_albedo=0.23; SoilHeatFluxFraction=0.4; NightInterceptionFraction=0.5; ReferenceHeight=2
      Irrigation
      Fertiliser
      SurfaceOrganicMatter: InitialResidueName=Sward; InitialResidueType=grass; InitialResidueMass=1000; InitialStandingFraction=0; InitialCPR=0; InitialCNR=15; FractionFaecesAdded=0.5
      PastureSpecies AGPRyegrass: same as SimpleRotation.Paddock00.AGPRyegrass
      PastureSpecies AGPWhiteClover: same as SimpleRotation.Paddock00.AGPWhiteClover
      Soil LismoreSoil: same as SimpleRotation.Paddock00.LismoreSoil
      Report: same as SimpleRotation.Paddock00.Report
  DataStore
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