Simulations: Version=69
  Simulation Wheat_Sheep
    Memo
      Di Mayberry (10/5/18)

      Sheep grazing wheat
      -

      This simulation contains the manager code for sheep to graze a wheat crop. For testing purposes there are 2 paddocks (each 1 ha) with continuous wheat. N is not limiting. Padd_WheatSheep  is grazed by sheep when conditions (biomass, zadok stage) are met. Padd_WheatOnly is not grazed, and is used as a comparison for crop growth.

      Things that are working:
      -
      1. sheep graze crop at right stage of crop growth
      2. sheep intake and growth rate are sensible

      Things that are not working:
      -
      1. Reported biomass removed /= biomass intake by sheep
      2. Zadok stage is not set back due to grazing

      Validation required once errors are fixed:
      1. Crop yields (grazed and ungrazed)
      2. Sheep liveweight gain

      References:
      Sprague SJ, Kirkegaard JA, Dove H, Graham JM, McDonald SE, Kelman WM (2015) Integrating dual-purpose wheat and canola into high-rainfall livestock systems in south-eastern Australia. 1. Crop forage and grain yield. Crop and Pasture Science 66(4), 365-376.

      Dove H, Kirkegaard JA, Kelman WM, Sprague SJ, McDonald SE, Graham JM (2015) Integrating dual-purpose wheat and canola into high-rainfall livestock systems in south-eastern Australia. 2. Pasture and livestock production. Crop and Pasture Science 66(4), 377-389.

      Bell LW, Dove H, McDonald SE, Kirkegaard JA (2015) Integrating dual-purpose wheat and canola into high-rainfall livestock systems in south-eastern Australia. 3. An extrapolation to whole-farm grazing potential, productivity and profitability. Crop and Pasture Science 66(4), 390-398.
    Clock: Start=2000-01-01; End=2012-12-31
    Summary SummaryFile
    Weather: FileName=%root%\Examples\WeatherFiles\lincoln.met
    SoilArbitrator
    Stock: RandSeed=9999
      PaddockList:
        {Area=1, Slope=0}
    Supplement: SpoilageTime=0
      Stores:
        {Name=fodder, Stored=0, IsRoughage=true, DMContent=0.85, DMD=0, MEContent=0, CPConc=0, ProtDg=0, PConc=0, SConc=0, EEConc=0, ADIP2CP=0, AshAlk=0, MaxPassage=0}
    Manager manage_stock
```csharp
/*--------------------------------------
Sheep grazing wheat
In this example simulation sheep are brought into the simulation to graze a wheat crop when crop biomass >= 2.4 t/ha.
Sheep stop grazing and are removed from the simulation when crop biomass reaches 0.5 t/ha or crop zadok = 31.


ERRORS TO CHECK
1. Biomass removed /= biomass intake
----------------------------------------*/


using System;
using Models.Core;
using Models.PMF;
using Models.Soils;
using Models.Utilities;
using Models.GrazPlan;
using APSIM.Shared.Utilities;

namespace Models
{
    [Serializable]
    public class Script : Model
    {
        [Link] Clock Calendar;
        [Link] Stock Animals;
        [Link] Supplement Feed;
        [Link] Summary Summary;
        [Link] Plant Wheat;
        [Link] Soil Soil; 
        [Link] Zone Paddock;

        private int no_to_buy;
        private int group_count;
        private int g;
        
        [EventSubscribe("DoManagement")]
        private void OnDoManagement(object sender, EventArgs e)
        {

        // purchase animals when wheat biomass > 2.4 t/ha
           
            double WheatBiomass = (double)Apsim.Get(Wheat,"AboveGround.Wt");     //wheat biomass = sum dead and live
            double Zadok = (double)Apsim.Get(Wheat,"Phenology.Zadok.Stage");

            if (Animals.NumberAll == 0)                                         //if there are no animals already in simulation
            {
                if (WheatBiomass >= 240.0 && Zadok < 31)                         //and if wheat biomass is >= 240 g/m2 and zadok < 31
                   {
                       g = Animals.NoGroups + 1;
                    no_to_buy = 50;                                                //number of animals to buy
                
                    StockBuy purchase = new StockBuy();
                    purchase.Genotype = "small merino";                            //animal genotype; see "stock" for more options
                    purchase.Number = no_to_buy;
                    purchase.Sex = "wethers";                                    //animal sex = wether, ewe, ram
                    purchase.Age = 12;                                            //animal age in months
                    purchase.Weight = 35.0;                                        //animal weight in kg
                    purchase.UseTag = g + 1;
                
                    Animals.Buy(purchase);
                    Animals.Move(g, "Padd_WheatSheep");                            //define paddock where fed
                  }
            }



        // Sell animals when wheat zadok >31 or wheat biomass <0.5 t/ha

            if (Zadok >= 31 || WheatBiomass <= 50)                                //if crop zadok >= 31 or wheat biomass <= 50 g/m2
            {
                group_count = Animals.NoGroups;
               
                Animals.Sell(0, Animals.NumberAll);
            }
        }
    }
}
```
    Zone Padd_WheatSheep: Area=1; Slope=0; AspectAngle=0; Altitude=50
      Fertiliser
      Soil: ASCOrder=Podzolic; SoilType=?; Site=Canberra; NearestTown=Canberra; Region=Gungahlin District; State=Australian Capital Territory; Country=Australia; ApsoilNumber=580-YP; Latitude=-35.201; Longitude=149.082
        DataSource=YP. Ginnenderra Experiment Station (GES). Data provided by James Hunt, based on measurements by John Kirkegaard, characterisation done by Julianne Lilley. Ginnenderra Experiment Station
        Physical
          Thickness  BD    AirDry  LL15   DUL   SAT
          100        1.42  0.04    0.059  0.21  0.408
          100        1.42  0.04    0.064  0.21  0.408
          200        1.48  0.05    0.085  0.21  0.427
          100        1.48  0.06    0.114  0.21  0.427
          200        1.48  0.08    0.13   0.21  0.427
          100        1.48  0.08    0.137  0.21  0.427
          200        1.48  0.09    0.141  0.21  0.427
          300        1.48  0.11    0.15   0.21  0.427
          300        1.48  0.11    0.161  0.21  0.427
          200        1.48  0.11    0.174  0.21  0.427
          200        1.48  0.11    0.174  0.21  0.427
          SoilCrop WheatSoil
            LL=[0.059, 0.064, 0.085, 0.114, 0.13, 0.137, 0.141, 0.15, 0.161, 0.174, 0.174]
            KL=[0.08, 0.08, 0.06, 0.05, 0.04, 0.03, 0.03, 0.02, 0.02, 0.01, 0.01]
            XF=[1, 1, 1, 1, 1, 1, 1, 1, 0.7, 0.4, 0]
        SoilWater: SummerDate=1-Nov; SummerU=6; SummerCona=2; WinterDate=1-Apr; WinterU=2; WinterCona=2; DiffusConst=88; DiffusSlope=35.4; Salb=0.13; CN2Bare=72; CNRed=20; CNCov=0.8; max_pond=0; Thickness=[100, 100, 200, 100, 200, 100, 200, 300, 300, 200, 200]; SWCON=[0.8, 0.8, 0.8, 0.8, 0.8, 0.8, 0.8, 0.8, 0.6, 0.6, 0.6]; PrecipitationInterception=0
        SoilNitrogen: fom_types=[default, manure, mucuna, lablab, shemp, stable]; fract_carb=[0.2, 0.3, 0.54, 0.57, 0.45, 0]; fract_cell=[0.7, 0.3, 0.37, 0.37, 0.47, 0.1]; fract_lign=[0.1, 0.4, 0.09, 0.06, 0.08, 0.9]
          SoilNitrogenNO3 NO3
          SoilNitrogenNH4 NH4
          SoilNitrogenUrea Urea
          SoilNitrogenPlantAvailableNO3 PlantAvailableNO3
          SoilNitrogenPlantAvailableNH4 PlantAvailableNH4
        Organic: FOMCNRatio=80
          Thickness  Carbon  SoilCNRatio  FBiom  FInert  FOM
          100        2.2     10           0.06   0       671.213
          100        0.5     10           0.05   0       577.718
          200        0.3     10           0.03   0.3     427.984
          100        0.2     10           0.02   0.4     368.37
          200        0.2     10           0.02   0.5     272.895
          100        0.15    10           0.01   0.6     234.883
          200        0.15    10           0.01   0.8     174.005
          300        0.1     10           0.01   0.9     110.951
          300        0.08    10           0.01   1       70.7453
          200        0.06    10           0.01   1       52.4094
          200        0.04    10           0.01   1       38.8259
        Chemical
          Thickness  NO3N      NH4N       PH
          100        0.377074  0.0377074  5.1
          100        0.377074  0.0377074  5.1
          200        0.377074  0.0377074  5.3
          100        0.377074  0.0377074  5.3
          200        0.377074  0.0377074  5.9
          100        0.377074  0.0377074  5.9
          200        0.377074  0.0377074  6.4
          300        0.377074  0.0377074  6.4
          300        0.377074  0.0377074  6.8
          200        0.377074  0.0377074  6.8
          200        1         0.2        6.8
        InitialWater: PercentMethod=0; FractionFull=1
        Sample InitialN: Depth=[0-180]; Thickness=[1800]; SWUnits=Volumetric; OCUnits=Total; PHUnits=Water
        CERESSoilTemperature
      SurfaceOrganicMatter: InitialResidueName=wheat_stubble; InitialResidueType=wheat; InitialResidueMass=500; InitialStandingFraction=0; InitialCPR=0; InitialCNR=100; FractionFaecesAdded=0.5
      Plant Wheat: CropType=Wheat; IsEnding=false; DaysAfterEnding=0
      MicroClimate: a_interception=0; b_interception=1; c_interception=0; d_interception=0; soil_albedo=0.3; SoilHeatFluxFraction=0.4; NightInterceptionFraction=0.5; ReferenceHeight=2
      Manager SowingRule
        StartDate = 1-mar
        EndDate = 30-mar
        MinESW = 0
        MinRain = 0
        RainDays = 0
        CultivarName = MacKellar
        SowingDepth = 30
        RowSpacing = 180
        Population = 200
```csharp
using System;
using Models.Core;
using Models.PMF;
using Models.Soils;
using Models.Utilities;
using APSIM.Shared.Utilities;

namespace Models
{
    [Serializable]
    public class Script : Model
    {
        [Link] Clock Clock;
        [Link] Fertiliser Fertiliser;
        [Link] Summary Summary;
        [Link] Plant Wheat;
        [Link] Soil Soil; 
        Accumulator accumulatedRain;
        
        [Description("Start of sowing window (d-mmm)")]
        public string StartDate { get; set;}
        [Description("End of sowing window (d-mmm)")]
        public string EndDate { get; set;}
        [Description("Minimum extractable soil water for sowing (mm)")]
        public double MinESW { get; set;}
        [Description("Accumulated rainfall required for sowing (mm)")]
        public double MinRain { get; set;}
        [Description("Duration of rainfall accumulation (d)")]
        public int RainDays { get; set;}
        [Description("Cultivar to be sown")]
        [Display(Type=DisplayType.CultivarName)]
        public string CultivarName { get; set;}
        [Description("Sowing depth (mm)")]
        public double SowingDepth { get; set;}        
        [Description("Row spacing (mm)")]
        public double RowSpacing { get; set;}    
        [Description("Plant population (/m2)")]
        public double Population { get; set;}    
        
        
        [EventSubscribe("Commencing")]
        private void OnSimulationCommencing(object sender, EventArgs e)
        {
            accumulatedRain = new Accumulator(this, "[Weather].Rain", RainDays);
        }
        

        [EventSubscribe("DoManagement")]
        private void OnDoManagement(object sender, EventArgs e)
        {
            accumulatedRain.Update();
            
            if (DateUtilities.WithinDates(StartDate,Clock.Today,EndDate) &&
                !Wheat.IsAlive &&
                MathUtilities.Sum(Soil.SoilWater.ESW) > MinESW &&
                accumulatedRain.Sum > MinRain)
            {
               Wheat.Sow(population:Population, cultivar:CultivarName, depth:SowingDepth, rowSpacing:RowSpacing);    
            }
        
        }
        
    }
}
```
      Manager SowingFertiliser
        Amount = 130
        CropName = wheat
```csharp
using System;
using Models.Core;
using Models.PMF;
namespace Models
{
    [Serializable]
    public class Script : Model
    {
        [Link] Clock Clock;
        [Link] Fertiliser Fertiliser;
        [Link] Summary Summary;
        
        
        [Description("Amount of fertiliser to be applied (kg/ha)")]
        public double Amount { get; set;}
        
        [Description("Crop to be fertilised")]
        public string CropName { get; set;}
        
        
        

        [EventSubscribe("Sowing")]
        private void OnSowing(object sender, EventArgs e)
        {
            Model crop = sender as Model;
            if (crop.Name.ToLower()==CropName.ToLower())
                Fertiliser.Apply(Amount: Amount, Type: Fertiliser.Types.NO3N);
        }
        
    }
}
```
      Manager Harvest
```csharp
using System;
using Models.Core;
using Models.PMF;
using Models.Soils;
using Models.Utilities;
using APSIM.Shared.Utilities;

namespace Models
{
    [Serializable]
    public class Script : Model
    {
        [Link] Plant Wheat;

        [EventSubscribe("DoManagement")]
        private void OnDoManagement(object sender, EventArgs e)
        {
            if (Wheat.IsReadyForHarvesting)
            {
               Wheat.Harvest();
               Wheat.EndCrop();    
            }
        
        }
        
    }
}
```
    Zone Padd_WheatOnly: same as Wheat_Sheep.Padd_WheatSheep
    Report Report_harvest: EventNames=[Wheat].Harvesting
      VariableNames:
        [Clock].Today
        [Padd_WheatSheep].Wheat.Grain.Total.Wt*10 as Yield_WheatSheep (kg/ha)
        [Padd_WheatOnly].Wheat.Grain.Total.Wt*10 as Yield_WheatOnly (kg/ha)
    Report Report_biomass: EventNames=[Clock].EndOfDay
      VariableNames:
        [Clock].Today
        [Padd_WheatSheep].Wheat.AboveGround.Wt as TotalBiomass_WheatSheep
        [Padd_WheatOnly].Wheat.AboveGround.Wt as TotalBiomass_WheatOnly
        [Padd_WheatSheep].Wheat.Phenology.Zadok.Stage as Zadok_WheatSheep
        [Padd_WheatOnly].Wheat.Phenology.Zadok.Stage as Zadok_WheatOnly
    Report Report_stock: EventNames=[Clock].EndOfDay
      VariableNames:
        [Clock].Today
        [Stock].Paddock
        [Stock].NumberAll as No_sheep
        [stock].NumberAll / [Padd_WheatSheep].Area as Stockrate
        [Stock].WeightAll as SheepWeight
        [stock].IntakeAll.Weight as intake_kgDM
        [Stock].IntakeAll.Weight * [Stock].NumberAll as Biomass Consumed
    Report Report_intake: EventNames=[Clock].EndOfDay
      VariableNames:
        [Clock].Today
        [Padd_WheatSheep].Wheat.AboveGround.Wt as TotalBiomass (g/m2)
        [Padd_WheatSheep].Wheat.Leaf.Removed.Wt + [Padd_WheatSheep].Wheat.Stem.Removed.Wt + [Padd_WheatSheep].Wheat.Spike.Removed.Wt + [Padd_WheatSheep].Wheat.Grain.Removed.Wt as BiomassRemoved (g/m2)
        [Stock].IntakeAll.Weight * [Stock].NumberAll as Biomass Consumed (kg/ha)
  DataStore
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