Simulations: Version=69
  Simulation Wheat_Sheep
    Memo
      Di Mayberry (10/5/18)

      Sheep grazing wheat and fed in feedlot
      -

      In this simulation sheep are bought and sold on a specified date. There is also working code that allows sheep to be sold based on age and purchased to maintain flock size. This was causing some errors with supplement feeding, so was turned off.

      There are two paddocks. A feedlot that contains sheep fed supplement, and a continous wheat crop. Sheep are moved from the feedlot onto the wheat crop based on crop biomass and zadok stage.

      Manage_stock
      -
      1. Buy animals at start of year & put in feedlot
      2. Move animals from feedlot to crop when ready to graze
      3. Move animals from crop to feedlot
      4. Shear all animals on specified date
      5. Sell all animals at end of year

      Manage_supplement
      -
      1. Feeds stock supplement at set amount in feedlot only
      2. Restocks supplement store when reaches minimum level

      Errors to fix
      -
      1. When an animal dies, extra supplement is fed (see spikes in supp intake graph)
      2. When sheep are culled for age + purchased to maintain stocking rate, several groups of sheep are created.
      This causes irregular amounts of supplement to be fed.
    Report Report_harvest: EventNames=[Wheat].Harvesting
      VariableNames:
        [Clock].Today
        [Wheat].Phenology.CurrentStageName
        [Padd_WheatSheep].Wheat.Grain.Total.Wt*10 as Yield //(kg/ha)
    Report Report_biomass: EventNames=[Clock].EndOfDay
      VariableNames:
        [Clock].Today
        [Padd_WheatSheep].Wheat.AboveGround.Wt as TotalBiomass
        [Padd_WheatSheep].Wheat.Phenology.Zadok.Stage as Zadok
    Report Report_stock: EventNames=[Clock].EndOfDay
      VariableNames:
        [Clock].Today
        [Stock].Paddock
        [Stock].Number as No_sheep
        [Stock].NumberAll
        [stock].NumberAll / [Padd_WheatSheep].Area as Stockrate //(sheep/ha)
        [Stock].Weight as SheepWeight // (kg)
        [Stock].Age/30.4 as SheepAge //(month)
    Report Report_supplement: EventNames=[Clock].EndOfDay
      VariableNames:
        [Clock].Today
        [Stock].Paddock as StockLocation
        [Stock].NumberAll
        [stock].IntakeAll.Weight as Intake //(kg)
        [Supplement].Name
        [Supplement].stores[2].Stored as SupplementStored // (kg)
        [Stock].SuppIntakeAll.Weight as SupplementIntake //(kg)
        [stock].SuppEaten as TotalSuppIntake //(kg)
        [stock].SuppIntake
    Clock: Start=2000-01-01; End=2012-12-31
    Summary SummaryFile
    Weather: FileName=%root%\Examples\WeatherFiles\lincoln.met
    SoilArbitrator
    Stock: RandSeed=9999
      PaddockList:
        {Area=1, Slope=0}
    Supplement: SpoilageTime=0
      Stores:
        Name            Stored  IsRoughage  DMContent  DMD  MEContent  CPConc  ProtDg  PConc   SConc   EEConc  ADIP2CP  AshAlk  MaxPassage
        fodder          0       true        0.85       0    0          0       0       0       0       0       0        0       0
        wheat, crushed  500     false       1          0.9  13.8       0.14    0.92    0.0038  0.0014  0.02    0.02     0.18    0
    Manager manage_stock
```csharp
/*-------------------------------------------------------------------------------------
Sheep grazing wheat when conditions are suitable, and in feedlot the rest of the time.
---------------------------------------------------------------------------------------

In this example simulation sheep are bought and sold on specified date.
They are fed supplement in a feedlot at a set rate, but graze a wheat crop when crop biomass >= 2.4 t/ha.
Sheep are moved from the wheat crop and back to feedlot when crop biomass reaches 0.5 t/ha or crop zadok = 31.

Based on Sprague SJ, Kirkegaard JA, Dove H, Graham JM, McDonald SE, Kelman WM (2015) Integrating dual-purpose wheat and canola into high-rainfall livestock systems in south-eastern Australia. 1. Crop forage and grain yield. Crop and Pasture Science 66(4), 365-376. 

Activities in this manager:
1. Buy animals at start of year & put in feedlot
2. Move animals from feedlot to crop when ready to graze
3. Move animals from crop to feedlot 
4. Shear all animals on specified date
5. Sell all animals at end of year

ERRORS TO FIX
1. When an animal dies, extra supplement is fed (see spikes in supp intake graph)
2. When sheep are culled for age + purchased to maintain stocking rate, several groups of sheep are created.
This causes irregular amounts of supplement to be fed.
--------------------------------------------------------------------------------------*/


using System;
using Models.Core;
using Models.PMF;
using Models.Soils;
using Models.Utilities;
using Models.GrazPlan;
using APSIM.Shared.Utilities;

namespace Models
{
    [Serializable]
    public class Script : Model
    {
        [Link] Clock Calendar;
        [Link] Stock Animals;
        [Link] Supplement Feed;
        [Link] Summary Summary;
        [Link] Plant Wheat;
        [Link] Soil Soil; 
        [Link] Zone Paddock;

        private double sale_age = 3.0;                                            // Age to sell animals (years)
        private int no_to_buy;
        private int group_count;
        private int g;
        
        [EventSubscribe("DoManagement")]
        private void OnDoManagement(object sender, EventArgs e)
        {

        // purchase animals annually

            if (DateUtilities.DatesEqual("01 JAN", Calendar.Today))
            {
                g = Animals.NoGroups + 1;
                no_to_buy = 50; //- Animals.NumberAll;                                // Max flock size = 50
                
                StockBuy purchase = new StockBuy();
                purchase.Genotype = "small merino";                                // Animal genotype. See "stock" for more options.
                purchase.Number = no_to_buy;
                purchase.Sex = "wethers";                                        // Animal sex = wether, ewe, ram
                purchase.Age = 12;                                                // Animal age in months
                purchase.Weight = 30.0;                                            // Animal weight in kg
                purchase.UseTag = g + 1;
                
                Animals.Buy(purchase);
                Animals.Move(Animals.NoGroups, "Feedlot");                        // Paddock where animals go after purchase
            }


        // Move animals to wheat for grazing based on wheat crop biomass and zadok stage

            double WheatBiomass = (double)Apsim.Get(Wheat,"AboveGround.Wt");     //wheat biomass = sum dead and live
            double Zadok = (double)Apsim.Get(Wheat,"Phenology.Zadok.Stage");

            if (WheatBiomass >= 240.0 && Zadok < 31)                             //and if wheat biomass is >= 240 g/m2 and zadok < 31
               {
                group_count = Animals.NoGroups;
                for (g = 1; g <= group_count; g++)

                {
                Animals.Move(g, "Padd_WheatSheep");                //move animals to paddock for grazing
                }
            }
            

        // Move animals back to feedlot when wheat zadok >31 or wheat biomass <0.5 t/ha

            if (Zadok >= 31 || WheatBiomass <= 50)                                //if crop zadok >= 31 or wheat biomass <= 50 g/m2
            {            
                group_count = Animals.NoGroups;
                for (g = 1; g <= group_count; g++)

                {
                Animals.Move(g, "Feedlot");
                }
            }


         // Shear all animals on specified date

            if (DateUtilities.DatesEqual("15 Dec", Calendar.Today))
            {
                Animals.Shear(0, "");
            }


          // Sell cast for age animals on specified date

            if (DateUtilities.DatesEqual("20 Dec", Calendar.Today))
            {
                group_count = Animals.NoGroups;
               
                Animals.Sell(0, Animals.NumberAll);

               /* group_count = Animals.NoGroups;
                for (g = 1; g <= group_count; g++)
                {
                    StockSplit split = new StockSplit();
                    split.Group = g;
                    split.Type = "age";
                    split.Value = 365 * sale_age;
                    Animals.Split(split);                                       // older animals into a new group
                }

                for (g = 1; g <= Animals.NoGroups; g++)
                {
                    if (Animals.Age[g - 1] >= 365 * sale_age)
                        Animals.Sell(g, Animals.Number[g - 1]);


                }*/
            }
            
           
        }
    }
}
```
    Manager manage_supplement
```csharp
/*--------------------------------------------------------------------------------------------------
Sheep grazing wheat when conditions are suitable, and in feedlot fed supplement the rest of the time.
----------------------------------------------------------------------------------------------------

This manager:
1. Feeds stock supplement at set amount in feedlot only
2. Restocks supplement store when reaches minimum level

--------------------------------------------------------------------------------------------------*/


using System;
using Models.Core;
using Models.PMF;
using Models.Soils;
using Models.Utilities;
using Models.GrazPlan;
using APSIM.Shared.Utilities;

namespace Models
{
    [Serializable]
    public class Script : Model
    {
        [Link] Clock Calendar;
        [Link] Stock Animals;
        [Link] Supplement Feed;
        [Link] Summary Summary;
        [Link] Plant Wheat;
        [Link] Soil Soil; 
        [Link] Zone Paddock;


        private int group_count;
        private int g;

        private string buy_date;  
           private string buy_name;
           private double buy_amount;
        
        [EventSubscribe("DoManagement")]
        private void OnDoManagement(object sender, EventArgs e)
        {



           // Feed animals supplement in Feedot only
               {
               string FeedPaddock = "Feedlot";                                        // Choose paddock where supplement is fed
             double SuppAmount = 0.5;                                            // Amount supplement to feed. Supplement fed is as-is (fresh weight) basis. Check %DM in supplement store.
             string SuppType = "wheat, crushed";

               for (int g = 1; g <= Animals.NoGroups; g++)
               {
                   FeedPaddock = Animals.Paddock[g - 1];

                   if (string.Compare(FeedPaddock, "Feedlot", true) == 0)            // Check if animals are currently in Feedlot paddock
                   {                                                                
                    Feed.Feed(SuppType, SuppAmount * Animals.NumberAll, FeedPaddock);     
                    Summary.WriteMessage(this,string.Format("{0}: Supplement fed: {1:0.00} kg of {2} to {3} sheep", Calendar.Today.ToShortDateString(), SuppAmount, SuppType, Animals.NumberAll));
                }
            }
            }     



          // Stock supplement store
              
 
              {    
                 if (Feed.Stores[1].Stored <= 500)                                // Minimum amount of supplement in store
                 {
                     Feed.Buy(5000,"wheat, crushed");                            // Amount (kg) and type of supplement to buy

                     Summary.WriteMessage(this,string.Format("{0}: Buy supplement: {1:0.00} kg of {2}", Calendar.Today.ToShortDateString(), 5000, "wheat, crushed"));
                 }
            }
         }
      }             
                  
    }
```
    Zone Padd_WheatSheep: Area=1; Slope=0; AspectAngle=0; Altitude=50
      Fertiliser
      Soil: ASCOrder=Podzolic; SoilType=?; Site=Canberra; NearestTown=Canberra; Region=Gungahlin District; State=Australian Capital Territory; Country=Australia; ApsoilNumber=580-YP; Latitude=-35.201; Longitude=149.082
        DataSource=YP. Ginnenderra Experiment Station (GES). Data provided by James Hunt, based on measurements by John Kirkegaard, characterisation done by Julianne Lilley. Ginnenderra Experiment Station
        Physical
          Thickness  BD    AirDry  LL15   DUL   SAT
          100        1.42  0.04    0.059  0.21  0.408
          100        1.42  0.04    0.064  0.21  0.408
          200        1.48  0.05    0.085  0.21  0.427
          100        1.48  0.06    0.114  0.21  0.427
          200        1.48  0.08    0.13   0.21  0.427
          100        1.48  0.08    0.137  0.21  0.427
          200        1.48  0.09    0.141  0.21  0.427
          300        1.48  0.11    0.15   0.21  0.427
          300        1.48  0.11    0.161  0.21  0.427
          200        1.48  0.11    0.174  0.21  0.427
          200        1.48  0.11    0.174  0.21  0.427
          SoilCrop WheatSoil
            LL=[0.059, 0.064, 0.085, 0.114, 0.13, 0.137, 0.141, 0.15, 0.161, 0.174, 0.174]
            KL=[0.08, 0.08, 0.06, 0.05, 0.04, 0.03, 0.03, 0.02, 0.02, 0.01, 0.01]
            XF=[1, 1, 1, 1, 1, 1, 1, 1, 0.7, 0.4, 0]
        SoilWater: SummerDate=1-Nov; SummerU=6; SummerCona=2; WinterDate=1-Apr; WinterU=2; WinterCona=2; DiffusConst=88; DiffusSlope=35.4; Salb=0.13; CN2Bare=72; CNRed=20; CNCov=0.8; max_pond=0; Thickness=[100, 100, 200, 100, 200, 100, 200, 300, 300, 200, 200]; SWCON=[0.8, 0.8, 0.8, 0.8, 0.8, 0.8, 0.8, 0.8, 0.6, 0.6, 0.6]; PrecipitationInterception=0
        SoilNitrogen: fom_types=[default, manure, mucuna, lablab, shemp, stable]; fract_carb=[0.2, 0.3, 0.54, 0.57, 0.45, 0]; fract_cell=[0.7, 0.3, 0.37, 0.37, 0.47, 0.1]; fract_lign=[0.1, 0.4, 0.09, 0.06, 0.08, 0.9]
          SoilNitrogenNO3 NO3
          SoilNitrogenNH4 NH4
          SoilNitrogenUrea Urea
          SoilNitrogenPlantAvailableNO3 PlantAvailableNO3
          SoilNitrogenPlantAvailableNH4 PlantAvailableNH4
        Organic: FOMCNRatio=80
          Thickness  Carbon  SoilCNRatio  FBiom  FInert  FOM
          100        2.2     10           0.06   0       671.213
          100        0.5     10           0.05   0       577.718
          200        0.3     10           0.03   0.3     427.984
          100        0.2     10           0.02   0.4     368.37
          200        0.2     10           0.02   0.5     272.895
          100        0.15    10           0.01   0.6     234.883
          200        0.15    10           0.01   0.8     174.005
          300        0.1     10           0.01   0.9     110.951
          300        0.08    10           0.01   1       70.7453
          200        0.06    10           0.01   1       52.4094
          200        0.04    10           0.01   1       38.8259
        Chemical
          Thickness  NO3N      NH4N       PH
          100        0.377074  0.0377074  5.1
          100        0.377074  0.0377074  5.1
          200        0.377074  0.0377074  5.3
          100        0.377074  0.0377074  5.3
          200        0.377074  0.0377074  5.9
          100        0.377074  0.0377074  5.9
          200        0.377074  0.0377074  6.4
          300        0.377074  0.0377074  6.4
          300        0.377074  0.0377074  6.8
          200        0.377074  0.0377074  6.8
          200        1         0.2        6.8
        InitialWater: PercentMethod=0; FractionFull=1
        Sample InitialN: Depth=[0-180]; Thickness=[1800]; SWUnits=Volumetric; OCUnits=Total; PHUnits=Water
        CERESSoilTemperature
      SurfaceOrganicMatter: InitialResidueName=wheat_stubble; InitialResidueType=wheat; InitialResidueMass=500; InitialStandingFraction=0; InitialCPR=0; InitialCNR=100; FractionFaecesAdded=0.5
      Plant Wheat: CropType=Wheat; IsEnding=false; DaysAfterEnding=0
      MicroClimate: a_interception=0; b_interception=1; c_interception=0; d_interception=0; soil_albedo=0.3; SoilHeatFluxFraction=0.4; NightInterceptionFraction=0.5; ReferenceHeight=2
      Manager SowingRule
        StartDate = 1-mar
        EndDate = 30-mar
        MinESW = 0
        MinRain = 0
        RainDays = 0
        CultivarName = MacKellar
        SowingDepth = 30
        RowSpacing = 180
        Population = 200
```csharp
using System;
using Models.Core;
using Models.PMF;
using Models.Soils;
using Models.Utilities;
using APSIM.Shared.Utilities;

namespace Models
{
    [Serializable]
    public class Script : Model
    {
        [Link] Clock Clock;
        [Link] Fertiliser Fertiliser;
        [Link] Summary Summary;
        [Link] Plant Wheat;
        [Link] Soil Soil; 
        Accumulator accumulatedRain;
        
        [Description("Start of sowing window (d-mmm)")]
        public string StartDate { get; set;}
        [Description("End of sowing window (d-mmm)")]
        public string EndDate { get; set;}
        [Description("Minimum extractable soil water for sowing (mm)")]
        public double MinESW { get; set;}
        [Description("Accumulated rainfall required for sowing (mm)")]
        public double MinRain { get; set;}
        [Description("Duration of rainfall accumulation (d)")]
        public int RainDays { get; set;}
        [Description("Cultivar to be sown")]
        [Display(Type=DisplayType.CultivarName)]
        public string CultivarName { get; set;}
        [Description("Sowing depth (mm)")]
        public double SowingDepth { get; set;}        
        [Description("Row spacing (mm)")]
        public double RowSpacing { get; set;}    
        [Description("Plant population (/m2)")]
        public double Population { get; set;}    
        
        
        [EventSubscribe("Commencing")]
        private void OnSimulationCommencing(object sender, EventArgs e)
        {
            accumulatedRain = new Accumulator(this, "[Weather].Rain", RainDays);
        }
        

        [EventSubscribe("DoManagement")]
        private void OnDoManagement(object sender, EventArgs e)
        {
            accumulatedRain.Update();
            
            if (DateUtilities.WithinDates(StartDate,Clock.Today,EndDate) &&
                !Wheat.IsAlive &&
                MathUtilities.Sum(Soil.SoilWater.ESW) > MinESW &&
                accumulatedRain.Sum > MinRain)
            {
               Wheat.Sow(population:Population, cultivar:CultivarName, depth:SowingDepth, rowSpacing:RowSpacing);    
            }
        
        }
        
    }
}
```
      Manager SowingFertiliser
        Amount = 130
        CropName = wheat
```csharp
using System;
using Models.Core;
using Models.PMF;
namespace Models
{
    [Serializable]
    public class Script : Model
    {
        [Link] Clock Clock;
        [Link] Fertiliser Fertiliser;
        [Link] Summary Summary;
        
        
        [Description("Amount of fertiliser to be applied (kg/ha)")]
        public double Amount { get; set;}
        
        [Description("Crop to be fertilised")]
        public string CropName { get; set;}
        
        
        

        [EventSubscribe("Sowing")]
        private void OnSowing(object sender, EventArgs e)
        {
            Model crop = sender as Model;
            if (crop.Name.ToLower()==CropName.ToLower())
                Fertiliser.Apply(Amount: Amount, Type: Fertiliser.Types.NO3N);
        }
        
    }
}
```
      Manager Harvest
```csharp
using System;
using Models.Core;
using Models.PMF;
using Models.Soils;
using Models.Utilities;
using APSIM.Shared.Utilities;

namespace Models
{
    [Serializable]
    public class Script : Model
    {
        [Link] Plant Wheat;

        [EventSubscribe("DoManagement")]
        private void OnDoManagement(object sender, EventArgs e)
        {
            if (Wheat.IsReadyForHarvesting)
            {
               Wheat.Harvest();
               Wheat.EndCrop();    
            }
        
        }
        
    }
}
```
    Zone Feedlot: Area=10; Slope=0; AspectAngle=0; Altitude=50
      Report: VariableNames=[Clock].Today
      Soil: ASCOrder=Vertosol; ASCSubOrder=Black; SoilType=Clay; Site=Norwin; NearestTown=Norwin; Region=Darling Downs and Granite Belt; State=Queensland; Country=Australia; NaturalVegetation=Qld. Bluegrass, possible Qld. Blue gum; ApsoilNumber=900; Latitude=-27.581836; Longitude=151.320206; LocationAccuracy=+/- 20m
        DataSource=CSIRO Sustainable Ecosystems, Toowoomba; Characteriesd as part of the GRDC funded project"Doing it better, doing it smarter, managing soil water in Australian agriculture' 2011
        Comments=OC, CLL for all crops estimated-based on Bongeen Mywybilla Soil No1
        Physical
          Thickness  BD       AirDry    LL15      DUL       SAT       KS
          150        1.01056  0.13025   0.2605    0.521     0.588655  20
          150        1.07146  0.198689  0.248362  0.496723  0.565677  20
          300        1.09394  0.28      0.28      0.488438  0.557193  20
          300        1.15861  0.28      0.28      0.480297  0.532787  20
          300        1.17301  0.28      0.28      0.471584  0.527354  20
          300        1.16287  0.28      0.28      0.457071  0.53118   20
          300        1.1875   0.28      0.28      0.452332  0.521888  20
          SoilCrop WheatSoil: LL=[0.261, 0.248, 0.28, 0.306, 0.36, 0.392, 0.446]; KL=[0.06, 0.06, 0.06, 0.04, 0.04, 0.02, 0.01]; XF=[1, 1, 1, 1, 1, 1, 1]
        SoilWater: SummerDate=1-Nov; SummerU=5; SummerCona=5; WinterDate=1-Apr; WinterU=5; WinterCona=5; DiffusConst=40; DiffusSlope=16; Salb=0.12; CN2Bare=73; CNRed=20; CNCov=0.8; max_pond=0; Thickness=[150, 150, 300, 300, 300, 300, 300]; SWCON=[0.3, 0.3, 0.3, 0.3, 0.3, 0.3, 0.3]; PrecipitationInterception=0
        SoilNitrogen: same as Wheat_Sheep.Padd_WheatSheep.Soil.SoilNitrogen
        Organic: FOMCNRatio=40
          Thickness  Carbon  SoilCNRatio  FBiom  FInert  FOM
          150        1.2     12           0.04   0.4     347.129
          150        0.96    12           0.02   0.6     270.344
          300        0.6     12           0.02   0.8     163.972
          300        0.3     12           0.02   1       99.4541
          300        0.18    12           0.01   1       60.322
          300        0.12    12           0.01   1       36.5871
          300        0.12    12           0.01   1       22.1912
        Chemical
          Thickness  NO3N  NH4N  PH
          150        1     0.1   8
          150        1     0.1   8
          300        1     0.1   8
          300        1     0.1   8
          300        1     0.1   8
          300        1     0.1   8
          300        1     0.1   8
        InitialWater: PercentMethod=1; FractionFull=1
        Sample InitialN: Thickness=[150, 150, 300, 300, 300, 300, 300]; SWUnits=Volumetric; OCUnits=Total; PHUnits=Water
        CERESSoilTemperature
      SurfaceOrganicMatter: InitialResidueName=wheat_stubble; InitialResidueType=wheat; InitialResidueMass=0; InitialStandingFraction=0; InitialCPR=0; InitialCNR=100; FractionFaecesAdded=0.5
      MicroClimate: a_interception=0; b_interception=1; c_interception=0; d_interception=0; soil_albedo=0.3; SoilHeatFluxFraction=0.4; NightInterceptionFraction=0.5; ReferenceHeight=2
  DataStore
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