Simulations: Version=94
  DataStore
  Simulation MassBalanceForage
    Memo
      This simulation checks the mass balance of animal / **plant** interactions. The plant model used is a PMF Slurp model that doesn't simulate plant growth. This makes it much easier to check mass balance.

      The checks are done in the MassBalanceCalculations manager script.

      The script first calculates the amount of pasture removed:

      	PastureRemoved = StartOfDayPasture - EndOfDayPasture;

      and the weight gain of the animals on a day.

      	LiveWeightGain = EndOfDayAnimal - StartOfDayAnimal;

      It then calculates two balance terms that should be zero. The first checks that pasture removed = animal intake.

      	LostWt = PastureRemoved.Wt - Intake.Wt;

      The second checks that N in the pasture removed = excreta N + the N retained by the animal.

      	LostN = PastureRemoved.N - (Excreta.N + LiveWeightGain.N);

      A check is then made (on day 1 of the simulation) that the faeces from the animal is added to the surface organic matter (som) model:

      	if (!MathUtilities.FloatsAreEqual(animals.FaecesAll.Weight, som.Wt))
      		throw new Exception("Mass balance error: The animal faeces weight on day 1 is not equal to surface organic matter weight.");

      A check is then made (on day 1 of the simulation) that the urine from the animal is added to the soil urea pool:

      	if (!MathUtilities.FloatsAreEqual(animals.UrineNAll, MathUtilities.Sum(urea.kgha)))
      		throw new Exception("Mass balance error: The animal urine on day 1 is not equal to soil urea amount.");

      These last checks are only done on day 1 because flows in and out of SOM and Urea pools make it difficult to calculate mass balance. The assumption is that if it works on day 1 it works for all other days.
    Clock: Start=2000-01-01; End=2000-05-31
    Summary SummaryFile
    Weather: FileName=%root%\Examples\WeatherFiles\lincoln.met
    SoilArbitrator
    Stock: RandSeed=9999
      PaddockList:
        {Area=1, Slope=0}
      GenotypeCross NZFriesianCross: MatureDeathRate=0; WeanerDeathRate=0; Conception=[0, 1, 0, 0]; DamBreed=Friesian; SireBreed=Jersey; Generation=1; SRW=550; PotFleeceWt=0; MaxFibreDiam=0; FleeceYield=0; PeakMilk=35
    Supplement: SpoilageTime=0
      Stores:
        Name            Stored  IsRoughage  DMContent  DMD  MEContent  CPConc  ProtDg  PConc   SConc   EEConc  ADIP2CP  AshAlk  MaxPassage
        fodder          0       true        0.85       0    0          0       0       0       0       0       0        0       0
        wheat, crushed  500000  false       1          0.9  13.8       0.14    0.92    0.0038  0.0014  0.02    0.02     0.18    0
        silage          50000   true        1          0.7  10         0.25    0.8     0.0032  0.0024  0.02    0.06     0.6     0
    Manager GrazeForageCrop
      Genotype = NZFriesianCross
      Sex = Female
      Age = 6
      Weight = 100
      Pregnant = 0
      Lactating = 0
      YoungNumber = 0
      YoungWt = 0
      StockingRate = 1
      CurrentLocation = Paddock
      PreGrazingDM = 2800
      PostGrazingDM = 50
      MinGrazingDays = 0
      DoNoGrazingWindow = False
      NoGrazeStart = 15-jun
      NoGrazeEnd = 31-jul
      SupplementName = silage
      SupplementFirst = False
      SupplementEveryDay = 0
      SupplementOnPastureMass = 0
      TriggerPastureMass = 2100
      NumStock = 0
      GrazingSeasonIsOpen = False
      HarvestableBiomass = 0
```csharp
using Models.PMF.Interfaces;
using System.Diagnostics;
using Models.AgPasture;
using System.Linq;
using System.Collections.Generic;
using System.Collections;
using Models.Soils;
using Models.PMF;
using System.Xml.Serialization;
using APSIM.Shared.Utilities;
using Models.GrazPlan;
using Models.Utilities;
using Models.Core;
using Models;
using System;

namespace Models
{

    [Serializable]
    public class Script : Model
    {
        [Link] Clock clock;
        [Link] Stock stock;
        [Link] Supplement supplement;
        [Link] List<Zone> paddocks;
        [Link] ISummary summary;
        [Link] Simulation farm;
        [Link] List<IPlantDamage> forages = null;

        private int CurrentGroupNum = 1;    // animal group number
        private int CurrentLocationNum { get; set; }

        [Separator("Stock type info, the same type of stock are brought onto the paddock at each grazing")]

        [Description("Stock: genotype (e.g. Small Merino, Angus, Friesian):")] 
        [Display(Values="GetGenotypes")]
        public string Genotype { get; set; }

        [Description("Stock: sex (Female, Male, Castrate):")] 
        public ReproductiveType Sex { get; set; }

        [Description("Stock: age (months):")] 
        public double Age { get; set; }

        [Description("Stock: weight (kg liveweight /head):")] 
        public double Weight { get; set; }

        [Description("Stock: fertility status (0 if non-pregnant or days since conception):")] 
        public int Pregnant { get; set; }

        [Description("Stock: lactation status (0 if non-lactating or days since parturition):")]
        public int Lactating { get; set; }

        [Description("Stock: number of unweaned young:")]
        public int YoungNumber { get; set; }

        [Description("Stock: weight of unweaned young:")] 
        public double YoungWt { get; set; }

        [Separator("Grazing event information")]

        [Description("Paddock stocking rate (head/ha): ")] 
        public double StockingRate { get; set; }

        [Description("Initial location of the cows (give either the paddock name or 'Away'): ")] 
        public string CurrentLocation { get; set; }

        [Description("Standing biomass at which to bring the stock into the simulation (kg DM/ha): ")] 
        public double PreGrazingDM { get; set; }

        [Description("Standing biomass at which to exit  stock from the simulation (kg DM/ha): ")] 
        public double PostGrazingDM { get; set; }

        [Description("Don't move the stock onto the crop unless there is approx. X days of grazable forage available: ")] 
        public int MinGrazingDays { get; set; }

        [Description("Implement a no-grazing window? (tick for yes): ")] 
        public bool DoNoGrazingWindow { get; set; }

        [Description("Start of the no-grazing window (dd-MMM)")] 
        public string NoGrazeStart { get; set; }

        [Description("End of the no-grazing window (dd-MMM)")] 
        public string NoGrazeEnd { get; set; }

        [Separator("Supplementary feeding")]

        [Description("Name of the supplement to feed: ")] 
        public string SupplementName { get; set; }

        [Description("Feed the supplement first (i.e. before the new forage is available to the stock)?: ")] 
        public bool SupplementFirst { get; set; }

        [Description("Amount of supplementary feeding offered every day (kg DM /head /day): ")] 
        public double SupplementEveryDay { get; set; }

        [Description("Additional amount of supplement offered when available biomass is low (kg DM /head /day): ")] 
        public double SupplementOnPastureMass { get; set; }

        [Description("Trigger biomass for above rule (kg DM /ha): ")] 
        public double TriggerPastureMass { get; set; }

        public int NumStock { get; set; }
        public bool GrazingSeasonIsOpen { get; set; } // number of cows on the whole farm
        public double HarvestableBiomass { get; set; }

        // Return a list of genotypes to the properties tab.
        public string[] GetGenotypes()
        {
            if (stock != null)
                return stock.Genotypes.Names.ToArray();
            return null;
        }

        [EventSubscribe("StartOfSimulation")]
        private void OnStartOfSimulation(object sender, EventArgs e)
        {

            //Debugger.Break();

            summary.WriteMessage(this, "Initialising the paddock information");

            NumStock = (int)(Math.Round(StockingRate * farm.Area, 0));

            if ((CurrentLocation.ToLower() != "away") && (NumStock > 0))
            {
                BuyStock();
                stock.Move(CurrentLocation, CurrentGroupNum);
                summary.WriteMessage(this, " The Stock have been moved to " + CurrentLocation);
            }

            summary.WriteMessage(this, "     The number of animals has been rounded to " + NumStock + " from " + (StockingRate * farm.Area));
            summary.WriteMessage(this, "     The animals will begin in " + CurrentLocation + " which is paddock number " + CurrentLocationNum + " in the simulation");
            summary.WriteMessage(this, "     The area of the whole farm is " + farm.Area + " ha");

        }

        [EventSubscribe("DoManagement")]
        private void OnDoManagement(object sender, EventArgs e)
        {
            GrazingSeasonIsOpen = true;
            if (DoNoGrazingWindow)
                GrazingSeasonIsOpen = !DateUtilities.WithinDates(NoGrazeStart, clock.Today, NoGrazeEnd);

            bool sellSomeStock = false;
            if (!GrazingSeasonIsOpen)
                sellSomeStock = true;

            // Calculate forage mass in the paddock
            HarvestableBiomass = 0.0;
            foreach (var forage in forages)
                foreach (var forageOrgan in forage.Organs)
                    if (forageOrgan.IsAboveGround)
                        HarvestableBiomass += forageOrgan.Live.Wt + forageOrgan.Dead.Wt;
            HarvestableBiomass *= 10;  // Convert to kg/ha

            if (HarvestableBiomass <= PostGrazingDM)
                sellSomeStock = true;

            if (CurrentLocation == "Away")
                sellSomeStock = false;

            double minFodder = 0.03 * MinGrazingDays * NumStock * Weight; // The 0.03 is the propostion of body mass that the stock might eat
            if (CurrentLocation == "Away" && NumStock > 0 && (HarvestableBiomass >= PreGrazingDM) && HarvestableBiomass >= (PostGrazingDM + minFodder) && GrazingSeasonIsOpen)
            {
                CurrentLocation = paddocks[0].Name;
                CurrentLocationNum = paddocks[0].Index;
                BuyStock();
                stock.Move(CurrentLocation, CurrentGroupNum);
                summary.WriteMessage(this, "     Buying stock ");
            }

            if (sellSomeStock)
            {
                CurrentLocation = "Away";
                CurrentLocationNum = -1;
                SellStock();
                summary.WriteMessage(this, "     Selling stock ");
            }

            if (CurrentLocation != "Away")
            {
                if (SupplementEveryDay > 0)
                {
                    double silageOnHand = supplement.Stores[2 - 1].Stored;
                    if (silageOnHand < SupplementEveryDay * stock.NumberAll)
                    {
                        supplement.Buy(SupplementEveryDay * 30.0 * stock.NumberAll, SupplementName);  // i.e. 1 months worth
                        summary.WriteMessage(this, "SupplementEveryDay: Buying " + SupplementName + " of total amount : " + (SupplementEveryDay * 90 * stock.NumberAll) + " kg DM");
                    }
                    supplement.Feed(SupplementName, SupplementEveryDay * stock.NumberAll, CurrentLocation, SupplementFirst);
                }

                if (SupplementOnPastureMass > 0 && HarvestableBiomass <= TriggerPastureMass)
                {
                    double silageOnHand = supplement.Stores[2 - 1].Stored;
                    if (silageOnHand < SupplementOnPastureMass * stock.NumberAll)
                    {
                        supplement.Buy(SupplementOnPastureMass * 30.0 * stock.NumberAll, SupplementName);  // i.e. 1 months worth
                        summary.WriteMessage(this, "SupplementOnBiomass: Buying " + SupplementName + " of total amount : " + (SupplementOnPastureMass * 90 * stock.NumberAll) + " kg DM");
                    }
                    supplement.Feed(SupplementName, SupplementOnPastureMass * stock.NumberAll, CurrentLocation, SupplementFirst);
                }
            }
        }


        public void BuyStock()
        {
            CurrentGroupNum = stock.NoGroups + 1;
            StockBuy purchase = new StockBuy();
            purchase.Genotype = Genotype;
            purchase.Number = NumStock;
            purchase.Sex = Sex;
            purchase.Age = Age;       // age in months
            purchase.Weight = Weight;  // live weight in kg
            purchase.UseTag = CurrentGroupNum + 1;
            purchase.MatedTo = purchase.Genotype;
            purchase.Pregnant = Pregnant;  // days pregnant, 0 = non pregnant, 1 = pregnant
            purchase.Lactating = Lactating;  // 0 for dry, 1 for lactating
            purchase.NumYoung = YoungNumber;
            purchase.YoungWt = YoungWt;

            stock.Buy(purchase);
        }

        public void SellStock()
        {
            int NumGroups = stock.NoGroups;

            NumGroups = stock.NoGroups;
            for (int gg = 1; gg <= NumGroups; gg++)
            {
                stock.Sell(stock.Number[gg - 1], gg);
            }
        }
    }
}
```
    Manager MassBalanceCalculations
      StartOfDayPasture =
      EndOfDayPasture =
      StartOfDaySupplement =
      EndOfDaySupplement =
      StartOfDayAnimal =
      EndOfDayAnimal =
      PastureRemoved =
      SupplementRemoved =
      LiveWeightGain =
      Intake =
      Excreta =
      LostN = 0
      LostWt = 0
```csharp
using Models.Surface;
using Models.PMF.Interfaces;
using System.Diagnostics;
using Models.AgPasture;
using System.Linq;
using System.Collections.Generic;
using System.Collections;
using Models.Soils;
using Models.PMF.Organs;
using Models.PMF;
using System.Xml.Serialization;
using APSIM.Shared.Utilities;
using Models.GrazPlan;
using Models.Interfaces;
using Models.Utilities;
using Models.Core;
using Models;
using System;

namespace Models
{

    [Serializable]
    public class Script : Model
    {
        [Link] Clock clock;
        [Link] IOrganDamage[] forages;
        [Link] Stock animals;
        [Link] Zone paddocks;
        [Link] ISummary summary;
        [Link] Simulation farm;
        [Link] Supplement supplement;
        [Link] SurfaceOrganicMatter som;
        [Link(ByName=true)] ISolute urea;

        public BiomassAndN StartOfDayPasture { get; set; }
        public BiomassAndN EndOfDayPasture { get; set; }
        public BiomassAndN StartOfDaySupplement { get; set; }
        public BiomassAndN EndOfDaySupplement { get; set; }
        public BiomassAndN StartOfDayAnimal { get; set; }
        public BiomassAndN EndOfDayAnimal { get; set; }
        public BiomassAndN PastureRemoved { get; set; }
        public BiomassAndN SupplementRemoved { get; set; }
        public BiomassAndN LiveWeightGain { get; set; }
        public BiomassAndN Intake { get; set; }
        public BiomassAndN Excreta { get; set; }

        public double LostN { get; set; } 
        public double LostWt { get; set; } 

        // Start of simulation
        [EventSubscribe("StartOfSimulation")]
        private void OnStart(object sender, EventArgs e)
        {
            forages = forages.Where(forage => forage.IsAboveGround && !(forage is SurfaceOrganicMatter)).ToArray();
        }

        // Start of day
        [EventSubscribe("StartOfDay")]
        private void OnDoManagement(object sender, EventArgs e)
        {
            StartOfDaySupplement = new BiomassAndN() 
            { 
                Wt = supplement.Stores.Sum(supp => supp.Stored),
                N = supplement.Stores[1].CPConc / 6.25 * supplement.Stores.Sum(supp => supp.Stored),
            };
            StartOfDayPasture = new BiomassAndN() 
            { 
                Wt = forages.Sum(forage => forage.Live.Wt * 10),
                N = forages.Sum(forage => forage.Live.N * 10),
            };
            StartOfDayAnimal = new BiomassAndN() 
            { 
                Wt = animals.WeightAll,
                N = 0,
            };
        }

        // End of day
        [EventSubscribe("DoManagementCalculations")]
        private void OnDoManagementCalculations(object sender, EventArgs e)
        {
            EndOfDaySupplement = new BiomassAndN() 
            { 
                Wt = supplement.Stores.Sum(supp => supp.Stored),
                N = supplement.Stores[1].CPConc / 6.25 * supplement.Stores.Sum(supp => supp.Stored),
            };
            EndOfDayPasture = new BiomassAndN() 
            { 
                Wt = forages.Sum(forage => forage.Live.Wt * 10),
                N = forages.Sum(forage => forage.Live.N * 10),
            };
            EndOfDayAnimal = new BiomassAndN() 
            { 
                Wt = animals.WeightAll,
                N = animals.RetainedNAll,    // kg/d
            };

            Intake = new BiomassAndN()
            {
                Wt = animals.IntakeAll.Weight,
                N = animals.IntakeAll.N,
            };
            Excreta = new BiomassAndN()
            {
                Wt = animals.FaecesAll.Weight,
                N = animals.FaecesAll.N + animals.UrineNAll,
            };

            PastureRemoved = StartOfDayPasture - EndOfDayPasture;
            SupplementRemoved = StartOfDaySupplement - EndOfDaySupplement;
            LiveWeightGain = EndOfDayAnimal - StartOfDayAnimal;

            // balance calculations
            LostWt = PastureRemoved.Wt - Intake.Wt; 
            LostN = PastureRemoved.N - (Excreta.N + LiveWeightGain.N);  

            if (!MathUtilities.FloatsAreEqual(LostWt, 0))
                throw new Exception("Mass balance error: Forage mass removed is not equal to animal intake.");
            if (!MathUtilities.FloatsAreEqual(LostN, 0))
                throw new Exception("Mass balance error: N balance error.");

            if (clock.Today.DayOfYear == 1)
            {
                if (!MathUtilities.FloatsAreEqual(animals.FaecesAll.Weight, som.Wt))
                    throw new Exception("Mass balance error: The animal faeces weight on day 1 is not equal to surface organic matter weight.");
                if (!MathUtilities.FloatsAreEqual(animals.UrineNAll, MathUtilities.Sum(urea.kgha)))
                    throw new Exception("Mass balance error: The animal urine on day 1 is not equal to soil urea amount.");
            }

        }
    }

    // Helper class for containing a mass and and N concentration.
    [Serializable]
    public class BiomassAndN
    {
        public double Wt { get; set; }
        public double N { get; set; }
        public static BiomassAndN operator +(BiomassAndN a, BiomassAndN b)
        {
            return new BiomassAndN()
            {
                Wt = a.Wt + b.Wt,
                N = a.N + b.N,
            };

        }
        public static BiomassAndN operator -(BiomassAndN a, BiomassAndN b)
        {
            return new BiomassAndN()
            {
                Wt = a.Wt - b.Wt,
                N = a.N - b.N,
            };
        }
    }
}
```
    Report: EventNames=[Clock].EndOfDay
      VariableNames:
        [Clock].Today as Date
        [Stock].NumberAll
        [Stock].WeightAll
        [MassBalanceCalculations].Script.SupplementRemoved as SupplementRemoved
        [MassBalanceCalculations].Script.PastureRemoved as PastureRemoved
        [MassBalanceCalculations].Script.Intake as Intake
        [MassBalanceCalculations].Script.Excreta as Excreta
        [MassBalanceCalculations].Script.LiveWeightGain as LiveWeightGain
        [MassBalanceCalculations].Script.LostN as LostN
        [MassBalanceCalculations].Script.LostWt as LostWt
        [SurfaceOrganicMatter].Wt
        [SurfaceOrganicMatter].N
        [Stock].FaecesAll
        [Stock].UrineNAll
        sum([Urea].kgha) as SoilUrea
    Zone Paddock: Area=1; Slope=0; AspectAngle=0; Altitude=50
      Manager SlurpSetup
```csharp
using System.Linq;
using System;
using Models.Core;
using Models.PMF;
using Models.PMF.Organs;
using System.Data;
    
namespace Models
{
    [Serializable]
    public class Script : Model
    {
        [Link] Plant slurp;

        [EventSubscribe("StartOfSimulation")]
        private void OnStartOfSimulation(object sender, EventArgs e)
        {
            var slurpLeaf = Apsim.Child(slurp, typeof(SimpleLeaf)) as SimpleLeaf;

            double wt = 500; // g/m2
            slurpLeaf.Live.StructuralWt = wt;
            slurpLeaf.Live.StorageWt = 0;
            slurpLeaf.Live.StructuralN = wt * slurpLeaf.MinNconc;
            slurpLeaf.Live.StorageN = wt * slurpLeaf.MaxNconc - slurpLeaf.Live.StructuralN;
        }
    }
}
```
      Plant Slurp: CropType=Slurp
      SurfaceOrganicMatter: InitialResidueName=wheat_stubble; InitialResidueType=wheat; InitialResidueMass=0; InitialStandingFraction=0; InitialCPR=0; InitialCNR=100
      Soil: ASCOrder=Vertosol; ASCSubOrder=Black; SoilType=Clay; Site=Norwin; NearestTown=Norwin; Region=Darling Downs and Granite Belt; State=Queensland; Country=Australia; NaturalVegetation=Qld. Bluegrass, possible Qld. Blue gum; ApsoilNumber=900; Latitude=-27.581836; Longitude=151.320206; LocationAccuracy=+/- 20m
        DataSource=CSIRO Sustainable Ecosystems, Toowoomba; Characteriesd as part of the GRDC funded project"Doing it better, doing it smarter, managing soil water in Australian agriculture' 2011
        Comments=OC, CLL for all crops estimated-based on Bongeen Mywybilla Soil No1
        Physical
          Thickness  BD       AirDry    LL15      DUL       SAT       KS
          150        1.01056  0.13025   0.2605    0.521     0.588655  20
          150        1.07146  0.198689  0.248362  0.496723  0.565677  20
          300        1.09394  0.28      0.28      0.488438  0.557193  20
          300        1.15861  0.28      0.28      0.480297  0.532787  20
          300        1.17301  0.28      0.28      0.471584  0.527354  20
          300        1.16287  0.28      0.28      0.457071  0.53118   20
          300        1.1875   0.28      0.28      0.452332  0.521888  20
          SoilCrop SlurpSoil: LL=[0.261, 0.248, 0.28, 0.306, 0.36, 0.392, 0.446]; KL=[0.06, 0.06, 0.06, 0.04, 0.04, 0.02, 0.01]; XF=[1, 1, 1, 1, 1, 1, 1]
        WaterBalance SoilWater: SummerDate=1-Nov; SummerU=5; SummerCona=5; WinterDate=1-Apr; WinterU=5; WinterCona=5; DiffusConst=40; DiffusSlope=16; Salb=0.12; CN2Bare=73; CNRed=20; CNCov=0.8; Thickness=[150, 150, 300, 300, 300, 300, 300]; SWCON=[0.3, 0.3, 0.3, 0.3, 0.3, 0.3, 0.3]
        SoilNitrogen: fom_types=[default, manure, mucuna, lablab, shemp, stable]; fract_carb=[0.2, 0.3, 0.54, 0.57, 0.45, 0]; fract_cell=[0.7, 0.3, 0.37, 0.37, 0.47, 0.1]; fract_lign=[0.1, 0.4, 0.09, 0.06, 0.08, 0.9]
          SoilNitrogenNO3 NO3
          SoilNitrogenNH4 NH4
          SoilNitrogenUrea Urea
          SoilNitrogenPlantAvailableNO3 PlantAvailableNO3
          SoilNitrogenPlantAvailableNH4 PlantAvailableNH4
        Organic: FOMCNRatio=40
          Thickness  Carbon  SoilCNRatio  FBiom  FInert  FOM
          150        1.2     12           0.04   0.4     347.129
          150        0.96    12           0.02   0.6     270.344
          300        0.6     12           0.02   0.8     163.972
          300        0.3     12           0.02   1       99.4541
          300        0.18    12           0.01   1       60.322
          300        0.12    12           0.01   1       36.5871
          300        0.12    12           0.01   1       22.1912
        Chemical
          Thickness  NO3N  NH4N  PH
          150        1     0.1   8
          150        1     0.1   8
          300        1     0.1   8
          300        1     0.1   8
          300        1     0.1   8
          300        1     0.1   8
          300        1     0.1   8
        InitialWater: PercentMethod=1; FractionFull=1
        Sample InitialN: Thickness=[150, 150, 300, 300, 300, 300, 300]; SWUnits=Volumetric; OCUnits=Total; PHUnits=Water
        CERESSoilTemperature
  Simulation MassBalanceFeedlot
    Memo
      This simulation checks the mass balance of animal / **supplement** interactions. The checks are done in the MassBalanceCalculations manager script.

      The script first calculates the amount of pasture removed:

      	PastureRemoved = StartOfDayPasture - EndOfDayPasture;

      and the weight gain of the animals on a day.

      	LiveWeightGain = EndOfDayAnimal - StartOfDayAnimal;

      It then calculates two balance terms that should be zero. The first checks that supplement removed = animal intake.

      	LostWt = SupplementRemoved.Wt - Intake.Wt;

      The second checks that N in the pasture removed = excreta N + the N retained by the animal.

      	LostN = PastureRemoved.N - (Excreta.N + LiveWeightGain.N);

      A check is then made (on day 1 of the simulation) that the faeces from the animal is added to the surface organic matter (som) model:

      	if (!MathUtilities.FloatsAreEqual(animals.FaecesAll.Weight, som.Wt))
      		throw new Exception("Mass balance error: The animal faeces weight on day 1 is not equal to surface organic matter weight.");

      A check is then made (on day 1 of the simulation) that the urine from the animal is added to the soil urea pool:

      	if (!MathUtilities.FloatsAreEqual(animals.UrineNAll, MathUtilities.Sum(urea.kgha)))
      		throw new Exception("Mass balance error: The animal urine on day 1 is not equal to soil urea amount.");

      These last checks are only done on day 1 because flows in and out of SOM and Urea pools make it difficult to calculate mass balance. The assumption is that if it works on day 1 it works for all other days.
    Clock: Start=2000-01-01; End=2000-05-31
    Summary SummaryFile
    Weather: FileName=%root%\Examples\WeatherFiles\lincoln.met
    SoilArbitrator
    Stock: same as MassBalanceForage.Stock
    Supplement: SpoilageTime=0
      Stores:
        Name    Stored  IsRoughage  DMContent  DMD  MEContent  CPConc  ProtDg  PConc   SConc   EEConc  ADIP2CP  AshAlk  MaxPassage
        fodder  0       true        0.85       0    0          0       0       0       0       0       0        0       0
        silage  50000   true        1          0.7  10         0.25    0.8     0.0032  0.0024  0.02    0.06     0.6     0
    Manager ManageStock
```csharp
using System.Linq;
using System;
using Models.Core;
using Models.Utilities;
using Models.GrazPlan;
using APSIM.Shared.Utilities;

namespace Models
{
    [Serializable]
    public class Script : Model
    {
        [Link] Clock Calendar;
        [Link] Stock Animals;
        [Link] Supplement Feed;

        private double sale_age = 3.0;
        private int no_to_buy;
        private int group_count;
        private int g;
        
        [EventSubscribe("DoManagement")]
        private void OnDoManagement(object sender, EventArgs e)
        {
            // purchase animals annually
            if (DateUtilities.DatesEqual("01 JAN", Calendar.Today))
            {
                g = Animals.NoGroups + 1;
                no_to_buy = 1;
                
                StockBuy purchase = new StockBuy();
                purchase.Genotype = "small merino";
                purchase.Number = no_to_buy;
                purchase.Sex = ReproductiveType.Castrate;
                purchase.Age = 12;
                purchase.Weight = 45.0;
                purchase.UseTag = g + 1;
                
                Animals.Buy(purchase);
                Animals.Move("Feedlot", g);
            }

            // Shearing all animals
            if (DateUtilities.DatesEqual("15 Dec", Calendar.Today))
            {
                Animals.Shear("");
            }
            
            // Sell cast for age animals
            if (DateUtilities.DatesEqual("20 Dec", Calendar.Today))
            {
                group_count = Animals.NoGroups;
                for (g = 1; g <= group_count; g++)
                {
                    StockSplit split = new StockSplit();
                    split.Group = g;
                    split.Type = "age";
                    split.Value = 365 * sale_age;
                    Animals.Split(split);                   // older animals into a new group
                }

                for (g = 1; g <= Animals.NoGroups; g++)
                {
                    if (Animals.Age[g - 1] >= 365 * sale_age)
                        Animals.Sell(Animals.Number[g - 1], g);
                }
            }
            
            if (Animals.NumberAll > 0)
                Feed.Feed("silage", 0.8 * Animals.NumberAll, "Feedlot");
        }
    }
}
```
    Manager MassBalanceCalculations
      StartOfDayPasture =
      EndOfDayPasture =
      StartOfDaySupplement =
      EndOfDaySupplement =
      StartOfDayAnimal =
      EndOfDayAnimal =
      PastureRemoved =
      SupplementRemoved =
      LiveWeightGain =
      Intake =
      Excreta =
      LostN = 0
      LostWt = 0
```csharp
using Models.Surface;
using Models.PMF.Interfaces;
using System.Diagnostics;
using Models.AgPasture;
using System.Linq;
using System.Collections.Generic;
using System.Collections;
using Models.Soils;
using Models.PMF.Organs;
using Models.PMF;
using System.Xml.Serialization;
using APSIM.Shared.Utilities;
using Models.GrazPlan;
using Models.Interfaces;
using Models.Utilities;
using Models.Core;
using Models;
using System;

namespace Models
{

    [Serializable]
    public class Script : Model
    {
        [Link] Clock clock;
        [Link] IOrganDamage[] forages;
        [Link] Stock animals;
        [Link] Zone paddocks;
        [Link] ISummary summary;
        [Link] Simulation farm;
        [Link] Supplement supplement;
        [Link] SurfaceOrganicMatter som;
        [Link(ByName=true)] ISolute urea;

        public BiomassAndN StartOfDayPasture { get; set; }
        public BiomassAndN EndOfDayPasture { get; set; }
        public BiomassAndN StartOfDaySupplement { get; set; }
        public BiomassAndN EndOfDaySupplement { get; set; }
        public BiomassAndN StartOfDayAnimal { get; set; }
        public BiomassAndN EndOfDayAnimal { get; set; }
        public BiomassAndN PastureRemoved { get; set; }
        public BiomassAndN SupplementRemoved { get; set; }
        public BiomassAndN LiveWeightGain { get; set; }
        public BiomassAndN Intake { get; set; }
        public BiomassAndN Excreta { get; set; }
       
        public double LostN { get; set; } 
        public double LostWt { get; set; } 



        // Start of simulation
        [EventSubscribe("StartOfSimulation")]
        private void OnStart(object sender, EventArgs e)
        {
            forages = forages.Where(forage => forage.IsAboveGround && !(forage is SurfaceOrganicMatter)).ToArray();
        }

        // Start of day
        [EventSubscribe("StartOfDay")]
        private void OnDoManagement(object sender, EventArgs e)
        {
            StartOfDaySupplement = new BiomassAndN() 
            { 
                Wt = supplement.Stores.Sum(supp => supp.Stored),
                N = supplement.Stores[1].CPConc / 6.25 * supplement.Stores.Sum(supp => supp.Stored),
            };
            StartOfDayPasture = new BiomassAndN() 
            { 
                Wt = forages.Sum(forage => forage.Live.Wt * 10),
                N = forages.Sum(forage => forage.Live.N * 10),
            };
            StartOfDayAnimal = new BiomassAndN() 
            { 
                Wt = animals.WeightAll,
                N = 0,
            };
        }

        // End of day
        [EventSubscribe("DoManagementCalculations")]
        private void OnDoManagementCalculations(object sender, EventArgs e)
        {
            EndOfDaySupplement = new BiomassAndN() 
            { 
                Wt = supplement.Stores.Sum(supp => supp.Stored),
                N = supplement.Stores[1].CPConc / 6.25 * supplement.Stores.Sum(supp => supp.Stored),
            };
            EndOfDayPasture = new BiomassAndN() 
            { 
                Wt = forages.Sum(forage => forage.Live.Wt * 10),
                N = forages.Sum(forage => forage.Live.N * 10),
            };
            EndOfDayAnimal = new BiomassAndN() 
            { 
                Wt = animals.WeightAll,
                N = animals.RetainedNAll,   // kg/d
            };

            Intake = new BiomassAndN()
            {
                Wt = animals.IntakeAll.Weight,
                N = animals.IntakeAll.N,
            };
            Excreta = new BiomassAndN()
            {
                Wt = animals.FaecesAll.Weight,
                N = animals.FaecesAll.N + animals.UrineNAll,
            };

            PastureRemoved = StartOfDayPasture - EndOfDayPasture;
            SupplementRemoved = StartOfDaySupplement - EndOfDaySupplement;
            LiveWeightGain = EndOfDayAnimal - StartOfDayAnimal;
            //  do a balance calc
            LostN = SupplementRemoved.N - (Excreta.N + LiveWeightGain.N);  
            LostWt = SupplementRemoved.Wt - animals.IntakeAll.Weight; 

            if (!MathUtilities.FloatsAreEqual(LostWt, 0))
                throw new Exception("Mass balance between supplement and stock has not been maintained: " + LostWt.ToString());
            if (!MathUtilities.FloatsAreEqual(LostN, 0))
                throw new Exception("Nitrogen mass balance between supplement and stock has not been maintained: " + LostN.ToString());

            if (clock.Today.DayOfYear == 1)
            {
                if (!MathUtilities.FloatsAreEqual(animals.FaecesAll.Weight, som.Wt))
                    throw new Exception("Mass balance error: The animal faeces weight on day 1 is not equal to surface organic matter weight.");
                if (!MathUtilities.FloatsAreEqual(animals.UrineNAll, MathUtilities.Sum(urea.kgha)))
                    throw new Exception("Mass balance error: The animal urine on day 1 is not equal to soil urea amount.");
            }
        }
    }

    // Helper class for containing a mass and and N concentration.
    [Serializable]
    public class BiomassAndN
    {
        public double Wt { get; set; }
        public double N { get; set; }
        public static BiomassAndN operator +(BiomassAndN a, BiomassAndN b)
        {
            return new BiomassAndN()
            {
                Wt = a.Wt + b.Wt,
                N = a.N + b.N,
            };

        }
        public static BiomassAndN operator -(BiomassAndN a, BiomassAndN b)
        {
            return new BiomassAndN()
            {
                Wt = a.Wt - b.Wt,
                N = a.N - b.N,
            };
        }
    }
}
```
    Report: same as MassBalanceForage.Report
    Zone Feedlot: Area=1; Slope=0; AspectAngle=0; Altitude=50
      SurfaceOrganicMatter: InitialResidueName=wheat_stubble; InitialResidueType=wheat; InitialResidueMass=0; InitialStandingFraction=0; InitialCPR=0; InitialCNR=100
      Soil: same as MassBalanceForage.Paddock.Soil
