Simulations: Version=70
  DataStore
  Simulation Forage Crop Grazing
    Memo
      This example shows a simple single-paddock simulation. The paddock contains a plantain crop that is irrigated and fertilised. The Plantain is sown in spring of the first year and is rejuvenated thereafter at the frequency set on the sowing rule in the paddock. In this simulation a new mob of animals are ‘bought’ every time the plantain (or any forage crop or crops) are ready to  be grazed. The user sets the characteristics of the stock, the grazing rules and if/how any supplementary feeding is done.

      **Stock Type Information**

      This section contains parameters for the genotype (e.g. Jersey, Small merino), reproductive type (e.g. Castrated male), age, weight, and fertility status. Every time the crop is to be grazed the animals of these characteristics are brought into the simulation. They will change status while grazing but will reset at each grazing event (they exit the simulation between grazing events).

      **Grazing event information**

      The stock parameters controlling the grazing event are the stocking rate (the numbers of animals bought will be controlled by this and the paddock area) and their location when the simulation is initialised.

      There are several parameters to control the timing of grazing events. Initially the paddock is assessed for the amount of grazable herbage at which the animals can enter and at which they must leave. The biomass is the sum of all the grazable components in the paddock. There is a option to set an approximate minimum number of days that it might be anticipated that the animals might stay on the paddock if they enter. This is designed to prevent many, very short-duration, grazing events. The estimate is based on a potential intake of 3% of body mass per day and is applied as an additional amount of biomass above the post-grazing biomass. Apart from the biomass based rules there is also an optional no-grazing window. Note that there is no control of grazing based on growth stage (as there might be for a cereal crop for example).

      **Supplementary feeding**

      The management script also allows for optional supplementary feeding. A specified supplement can be feed every day and/or when the biomass in the grazed paddock falls below a set value. The supplement can be fed before grazing (i.e. as an intake priority) or animals can choose between offered supplement and forage depending on digestibility and availability (see the Stock Science Documentation for more information). Every time that a supplement about to be fed out the script buys sufficient supplement to last about a month.

      **Reporting Outputs**

      There are several example outputs included in the Report model. The documentation for the Report model for the general syntax which here is set up to accommodate means, sums or last values of the reporting interval. In this short example the reporting interval is every day but for longer simulations it might be desirable to set up reporting at the end of each month or grazing event for example.
    Clock: Start=2010-09-01; End=2012-08-31
    Weather: FileName=%root%\Examples\WeatherFiles\lincoln.met
    Summary
    SoilArbitrator Soil Arbitrator
    MicroClimate: a_interception=0; b_interception=1; c_interception=0; d_interception=0; soil_albedo=0.23; SoilHeatFluxFraction=0.4; NightInterceptionFraction=0.5; ReferenceHeight=2
    Supplement: SpoilageTime=0
      Stores:
        Name    Stored  IsRoughage  DMContent  DMD   MEContent  CPConc  ProtDg  PConc   SConc   EEConc  ADIP2CP  AshAlk  MaxPassage
        fodder  0       true        0.85       0     0          0       0       0       0       0       0        0       0
        silage  0       true        1          0.75  12         0.18    0.8     0.0032  0.0024  0.02    0.06     0.6     0
    Stock: RandSeed=9999
      GenoTypes:
        {DeathRate=[0.02, 0.02], Conceptions=[0, 0.54, 0.41, 0], GenotypeName=Small Merino, Generation=0, SRW=40, PotFleeceWt=3.6, MaxFibreDiam=19, FleeceYield=0.7, PeakMilk=0}
      PaddockList:
        {Area=1, Slope=0}
    Manager GrazeForageCrop
      Genotype = Friesian
      Sex = Steers
      Age = 12
      Weight = 280
      Pregnant = 0
      Lactating = 0
      YoungNumber = 0
      YoungWt = 0
      StockingRate = 50
      CurrentLocation = Away
      PreGrazingDM = 2800
      PostGrazingDM = 1900
      MinGrazingDays = 7
      DoNoGrazingWindow = True
      NoGrazeStart = 15-jun
      NoGrazeEnd = 31-jul
      SupplementName = silage
      SupplementFirst = True
      SupplementEveryDay = 0
      SupplementOnPastureMass = 2
      TriggerPastureMass = 2100
      NumStock = 0
      GrazingSeasonIsOpen = False
      HarvestableBiomass = 0
```csharp
using System;
using Models;
using Models.Core;
using Models.Utilities;
using Models.GrazPlan;
using APSIM.Shared.Utilities;
using System.Xml.Serialization;
using Models.PMF;
using Models.Soils; 
using System.Collections;
using System.Collections.Generic;
using System.Linq;
using Models.AgPasture;
using System.Diagnostics;
using Models.PMF.Interfaces;

namespace Models
{

    [Serializable]
    public class Script : Model
    {
        [Link] Clock clock;
        [Link] Stock stock;
        [Link] Supplement supplement;
        [Link] List<Zone> paddocks;
        [Link] ISummary summary;
        [Link] Simulation farm;
        [Link] List<IPlantDamage> forages = null;

        private int CurrentGroupNum = 1;    // animal group number
        private int CurrentLocationNum { get; set; }

        public enum Genotypes
        {
            SmallMerino,
            Angus,
            Friesian
        }

        public enum SexTypes
        {
            Cows,
            Heifers,
            Steers,
            Bulls,
            Ewes,
            Weathers,
            Rams,
            Cryptos
        }


        [Separator("Stock type info, the same type of stock are brought onto the paddock at each grazing")]

        [Description("Stock: genotype (e.g. Small Merino, Angus, Friesian):")] 
        public Genotypes Genotype { get; set; }

        [Description("Stock: sex (Cows, Heifers, Steers, Bulls, Ewes, Weathers, Rams, Cryptos):")] 
        public SexTypes Sex { get; set; }

        [Description("Stock: age (months):")] 
        public double Age { get; set; }

        [Description("Stock: weight (kg liveweight /head):")] 
        public double Weight { get; set; }

        [Description("Stock: fertility status (0 if non-pregnant or days since conception):")] 
        public int Pregnant { get; set; }

        [Description("Stock: lactation status (0 if non-lactating or days since parturition):")]
        public int Lactating { get; set; }

        [Description("Stock: number of unweaned young:")]
        public int YoungNumber { get; set; }

        [Description("Stock: weight of unweaned young:")] 
        public double YoungWt { get; set; }

        [Separator("Grazing event information")]

        [Description("Paddock stocking rate (head/ha): ")] 
        public double StockingRate { get; set; }

        [Description("Initial location of the cows (give either the paddock name or 'Away'): ")] 
        public string CurrentLocation { get; set; }

        [Description("Standing biomass at which to bring the stock into the simulation (kg DM/ha): ")] 
        public double PreGrazingDM { get; set; }

        [Description("Standing biomass at which to exit  stock from the simulation (kg DM/ha): ")] 
        public double PostGrazingDM { get; set; }

        [Description("Don't move the stock onto the crop unless there is approx. X days of grazable forage available: ")] 
        public int MinGrazingDays { get; set; }

        [Description("Implement a no-grazing window? (tick for yes): ")] 
        public bool DoNoGrazingWindow { get; set; }

        [Description("Start of the no-grazing window (dd-MMM)")] 
        public string NoGrazeStart { get; set; }

        [Description("End of the no-grazing window (dd-MMM)")] 
        public string NoGrazeEnd { get; set; }

        [Separator("Supplementary feeding")]

        [Description("Name of the supplement to feed: ")] 
        public string SupplementName { get; set; }

        [Description("Feed the supplement first (i.e. before the new forage is available to the stock)?: ")] 
        public bool SupplementFirst { get; set; }

        [Description("Amount of supplementary feeding offered every day (kg DM /head /day): ")] 
        public double SupplementEveryDay { get; set; }

        [Description("Additional amount of supplement offered when available biomass is low (kg DM /head /day): ")] 
        public double SupplementOnPastureMass { get; set; }

        [Description("Trigger biomass for above rule (kg DM /ha): ")] 
        public double TriggerPastureMass { get; set; }

        public int NumStock { get; set; }
        public bool GrazingSeasonIsOpen { get; set; } // number of cows on the whole farm
        public double HarvestableBiomass { get; set; }


        [EventSubscribe("StartOfSimulation")]
        private void OnStartOfSimulation(object sender, EventArgs e)
        {

            //Debugger.Break();

            summary.WriteMessage(this, "Initialising the paddock information");

            NumStock = (int)(Math.Round(StockingRate * farm.Area, 0));

            if (CurrentLocation.ToLower() != "away")
            {
                BuyStock();
                stock.Move(CurrentGroupNum, CurrentLocation);
                summary.WriteMessage(this, " The Stock have been moved to " + CurrentLocation);
            }

            summary.WriteMessage(this, "     The number of animals has been rounded to " + NumStock + " from " + (StockingRate * farm.Area));
            summary.WriteMessage(this, "     The animals will begin in " + CurrentLocation + " which is paddock number " + CurrentLocationNum + " in the simulation");
            summary.WriteMessage(this, "     The area of the whole farm is " + farm.Area + " ha");

        }

        [EventSubscribe("DoManagement")]
        private void OnDoManagement(object sender, EventArgs e)
        {
            GrazingSeasonIsOpen = true;
            if (DoNoGrazingWindow)
                GrazingSeasonIsOpen = !DateUtilities.WithinDates(NoGrazeStart, clock.Today, NoGrazeEnd);

            bool sellSomeStock = false;
            if (!GrazingSeasonIsOpen)
                sellSomeStock = true;

            // Calculate forage mass in the paddock
            HarvestableBiomass = 0.0;
            foreach (var forage in forages)
                foreach (var forageOrgan in forage.Organs)
                	if (forageOrgan.IsAboveGround)
                    	HarvestableBiomass += forageOrgan.Live.Wt + forageOrgan.Dead.Wt;
            HarvestableBiomass *= 10;  // Convert to kg/ha

            if (HarvestableBiomass <= PostGrazingDM)
                sellSomeStock = true;

            if (CurrentLocation == "Away")
                sellSomeStock = false;

            double minFodder = 0.03 * MinGrazingDays * NumStock * Weight; // The 0.03 is the propostion of body mass that the stock might eat
            if (CurrentLocation == "Away" && (HarvestableBiomass >= PreGrazingDM) && HarvestableBiomass >= (PostGrazingDM + minFodder) && GrazingSeasonIsOpen)
            {
                CurrentLocation = paddocks[0].Name;
                CurrentLocationNum = paddocks[0].Index;
                BuyStock();
                stock.Move(CurrentGroupNum, CurrentLocation);
                summary.WriteMessage(this, "     Buying stock ");
            }

            if (sellSomeStock)
            {
                CurrentLocation = "Away";
                CurrentLocationNum = -1;
                SellStock();
                summary.WriteMessage(this, "     Selling stock ");
            }

            if (CurrentLocation != "Away")
            {
                if (SupplementEveryDay > 0)
                {
                    double silageOnHand = supplement.Stores[2 - 1].Stored;
                    if (silageOnHand < SupplementEveryDay * stock.NumberAll)
                    {
                        supplement.Buy(SupplementEveryDay * 30.0 * stock.NumberAll, SupplementName);  // i.e. 1 months worth
                        summary.WriteMessage(this, "SupplementEveryDay: Buying " + SupplementName + " of total amount : " + (SupplementEveryDay * 90 * stock.NumberAll) + " kg DM");
                    }
                    supplement.Feed(SupplementName, SupplementEveryDay * stock.NumberAll, CurrentLocation, SupplementFirst);
                }

                if (SupplementOnPastureMass > 0 && HarvestableBiomass <= TriggerPastureMass)
                {
                    double silageOnHand = supplement.Stores[2 - 1].Stored;
                    if (silageOnHand < SupplementOnPastureMass * stock.NumberAll)
                    {
                        supplement.Buy(SupplementOnPastureMass * 30.0 * stock.NumberAll, SupplementName);  // i.e. 1 months worth
                        summary.WriteMessage(this, "SupplementOnBiomass: Buying " + SupplementName + " of total amount : " + (SupplementOnPastureMass * 90 * stock.NumberAll) + " kg DM");
                    }
                    supplement.Feed(SupplementName, SupplementOnPastureMass * stock.NumberAll, CurrentLocation, SupplementFirst);
                }
            }
        }


        public void BuyStock()
        {
            CurrentGroupNum = stock.NoGroups + 1;
            StockBuy purchase = new StockBuy();
            purchase.Genotype = ReflectionUtilities.EnumToString(Genotype);
            purchase.Number = NumStock;
            purchase.Sex = ReflectionUtilities.EnumToString(Sex);
            purchase.Age = Age;       // age in months
            purchase.Weight = Weight;  // live weight in kg
            purchase.UseTag = CurrentGroupNum + 1;
            purchase.MatedTo = purchase.Genotype;
            purchase.Pregnant = Pregnant;  // days pregnant, 0 = non pregnant, 1 = pregnant
            purchase.Lactating = Lactating;  // 0 for dry, 1 for lactating
            purchase.NumYoung = YoungNumber;
            purchase.YoungWt = YoungWt;

            stock.Buy(purchase);
        }

        public void SellStock()
        {
            int NumGroups = stock.NoGroups;

            NumGroups = stock.NoGroups;
            for (int gg = 1; gg <= NumGroups; gg++)
            {
                stock.Sell(gg, stock.Number[gg - 1]);
            }
        }
    }
}
```
    Report: EventNames=[Clock].EndOfDay
      VariableNames:
        [Clock].Today as Date
        Mean of [Stock].NumberAll from [Report].DayAfterLastOutput to [Clock].Today as NumStock
        Mean of [Stock].IntakeAll.Weight from [Report].DayAfterLastOutput to [Clock].Today as AveDMIntake
        Mean of [Stock].MEIntakeAll from [Report].DayAfterLastOutput to [Clock].Today as AveMEIntake
        Mean of [Stock].WeightAll from [Report].DayAfterLastOutput to [Clock].Today as AveBodyMass
        Mean of [Stock].CondScoreAll from [Report].DayAfterLastOutput to [Clock].Today as AveConditionScore
        Mean of [Stock].MilkWtAll from [Report].DayAfterLastOutput to [Clock].Today as AveMilkWeight4pcCorr
        Mean of ([Stock].MilkWtAll * 0.04 * 1.8) from [Report].DayAfterLastOutput to [Clock].Today as AveMilkSolids // note the "0.04" is to convert the 4% fat corrected to dry milk fat, the "1.8" is on the assumption that protein is 80% of the fat content
        Last of [GrazeForageCrop].Script.CurrentLocationNum from [Report].DayAfterLastOutput to [Clock].Today as CurrentLocationNum
        Last of [GrazeForageCrop].Script.HarvestableBiomass from [Report].DayAfterLastOutput to [Clock].Today as HarvestableBiomass
        Last of [Supplement].stores[2].Stored from [Report].DayAfterLastOutput to [Clock].Today as SupplementRemaining
        Last of [Field].Plantain.AboveGroundLive.Wt * 10.0 from [Report].DayAfterLastOutput to [Clock].Today as PlantainMass
        [Stock].Paddock
    Memo Memo1
      The first plots shows the location of the stock (on the paddock or ‘away’), the grazable biomass in the paddock and the supplement remaining in the store. The second plot shows average body mass and average dry matter intake. Note how body mass resets to a consistent value at the start of each grazing event. This is because a new mob of animals is bought at the start of each grazing event.

      The shaded area behind the plots shows the location of the stock (get this to show but adding a "ShadedBarsOnGraph" model to a Graph|Series). Clicking on one of the shaded areas will pop up the name of the location.
    Zone Field: Area=1; Slope=0; AspectAngle=0; Altitude=50
      Manager SowingRule
        StartDate = 1-oct
        EndDate = 30-oct
        MinESW = 50
        MinRain = 30
        RainDays = 5
        mustSow = yes
        SowingFreq = 3
        CultivarName = Tonic
        SowingDepth = 10
        RowSpacing = 150
        Population = 200
        Amount = 60
        CropAge = 0
```csharp
using System;
using Models.Core;
using Models.PMF;
using Models.Soils;
using Models.Utilities;
using APSIM.Shared.Utilities;

namespace Models
{
    [Serializable]
    public class Script : Model
    {
        [Link] Clock Clock;
        [Link] Fertiliser Fertiliser;
        [Link] Summary Summary;
        [Link] Plant Plantain;
        [Link] Soil Soil; 
        Accumulator accumulatedRain;

        [Separator("======= Sowing conditions =======")]
        [Description("Start of sowing window (dd-mmm)")] public string StartDate { get; set;}
        [Description("End of sowing window (dd-mmm)")] public string EndDate { get; set;}
        [Description("Minimum extractable soil water for sowing (mm)")] public double MinESW { get; set;}
        [Description("Accumulated rainfall required for sowing (mm)")] public double MinRain { get; set;}
        [Description("Duration of rainfall accumulation (d)")] public int RainDays { get; set;}
        [Description("Must sow at the end of the window?")] public answerType mustSow { get; set; }
        [Description("Frequency of sowing (years)")] public int SowingFreq { get; set; }
    

        [Separator("======= Sowing data =======")]
        [Description("Cultivar to be sown")] public string CultivarName { get; set;}
        [Description("Sowing depth (mm)")] public double SowingDepth { get; set;}        
        [Description("Row spacing (mm)")] public double RowSpacing { get; set;}    
        [Description("Plant population (/m2)")] public double Population { get; set;}    

        [Separator("======= Sowing fertiliser =======")]
        [Description("Amount of fertiliser to be applied (kg/ha)")] public double Amount { get; set;}


        public double CropAge { get; set; }

           public enum answerType
        {
            /// <summary>a positive answer</summary>
            yes,
            /// <summary>a negative answer</summary>
            no
        }

        
        [EventSubscribe("Commencing")]
        private void OnSimulationCommencing(object sender, EventArgs e)
        {
            accumulatedRain = new Accumulator(this, "[Weather].Rain", RainDays);
            CropAge = SowingFreq + 1.0;
        }
        

        [EventSubscribe("DoManagement")]
        private void OnDoManagement(object sender, EventArgs e)
        {
            accumulatedRain.Update();
            CropAge += 1.0 / 365.25;

            bool doSowing = false;
            if (DateUtilities.WithinDates(StartDate,Clock.Today,EndDate) && !Plantain.IsAlive)
                doSowing = true;
            if ((MathUtilities.Sum(Soil.SoilWater.ESW) < MinESW) || (accumulatedRain.Sum < MinRain))
                doSowing = false;
            if ((mustSow == answerType.yes) && (DateUtilities.DatesEqual(EndDate, Clock.Today)))
                doSowing = true;
            if (CropAge < SowingFreq)
                doSowing = false;
            
            if (doSowing)
            {
               Plantain.Sow(population:Population, cultivar:CultivarName, depth:SowingDepth, rowSpacing:RowSpacing);
               Fertiliser.Apply(Amount: Amount, Type: Fertiliser.Types.NO3N);    
               CropAge = 0.0;
            }
        
        }
        
    }
}
```
      Manager AutomaticIrrigation
        allowIrrigation = yes
        seasonStart = 15-Sep
        seasonEnd = 30-Apr
        seasonsAllocation = 10000
        triggerDeficit = 75
        targetDeficit = 95
        returndays = 3
        maximumAmount = 15
        depthPAWC = 500
```csharp
using System;
using Models.Core;
using Models.PMF;
using Models.Soils;
using System.Xml.Serialization;
using Models.PMF;
using APSIM.Shared.Utilities;

        
namespace Models
{
    [Serializable] 
    [System.Xml.Serialization.XmlInclude(typeof(Model))]
    public class Script : Model
    {
        //Communication to other modules
        [Link] ISummary summary = null;
        [Link] Irrigation Irrigation;
        [Link] Clock Clock;
        [Link] Soil Soil;
        [Link(IsOptional = true)] Plant existingCrop;
       
        //User inputs from properties tab
        [Description("Turn irrigation on?")]
        public answerType allowIrrigation { get; set; }
        [Description("Start of irrigation season (dd-MMM)")]
        public string seasonStart { get; set; }
        [Description("End of irrigation season (dd-MMM)")]
        public string seasonEnd { get; set; }
        [Description("Season allocation (mm)")]
        public double seasonsAllocation { get; set; }
        [Description("Deficit to trigger irrigation (% PAWC)")]
        public double triggerDeficit { get; set; }
        [Description("Deficit to stop irrigaton (% PAWC)")]
        public double targetDeficit { get; set; }
        [Description("Minimum days for irrigation to return")]
        public double returndays { get; set; }
        [Description("Maximum irrigation application (mm/day)")]
        public double maximumAmount { get; set; }
        [Description("Depth to calculate PAWC (mm)")]
        public double depthPAWC { get; set; }
       
        public enum answerType
        {
            /// <summary>a positive answer</summary>
            yes,
            /// <summary>a negative answer</summary>
            no
        }

        //Class members
        [XmlIgnore] public double TopSWdeficit { get; set; }
        [XmlIgnore] public double TopSWC { get; set; }
        [XmlIgnore] public double DaysSinceIrrigation { get; set; }
        [XmlIgnore] public double AmountToApply { get; set; }
        [XmlIgnore] public double SeasonAppliedAmount { get; set; }
        
        private bool IrrigationIsAllowed { get; set; }
        private bool SeasonIsOpen { get; set; }
        private bool CropIsActive { get; set; }
        private bool IrrigatorIsAvailable { get; set; }
        private bool SoilIsDry { get; set; }

        private DateTime StartDate;
        private DateTime EndDate;
        private double TopDUL;
        private double TopLL;
        private int nLayers;
    
        //Calculate static soil variables
        [EventSubscribe("StartOfSimulation")]
        private void OnStartOfSimulation(object sender, EventArgs e)
        {   
            //Set the season dates
            StartDate = DateTime.Parse(seasonStart + "-" + Clock.Today.Year.ToString());
            EndDate = DateTime.Parse(seasonEnd + "-" + Clock.Today.Year.ToString());
            
            //Can we irrigate at all?
            IrrigationIsAllowed = false; 
            if (allowIrrigation == answerType.yes)
                IrrigationIsAllowed = true; 

            //Calculate soil water variables
            double depthFromSurface = 0.0;
            double fracLayer = 0.0;
            nLayers = Soil.Thickness.Length;
            for (int layer = 0; layer < nLayers; layer++)
            {
                fracLayer = Math.Min(1.0, (depthPAWC - depthFromSurface) / Soil.Thickness[layer]);
                TopLL += Soil.LL15mm[layer] * fracLayer;
                TopDUL += Soil.DULmm[layer] * fracLayer;
                depthFromSurface += Soil.Thickness[layer];
                if (depthFromSurface >= depthPAWC)
                    layer = nLayers;
            }
        }
             
        //Determine daily requirement for irrigation
        [EventSubscribe("StartOfDay")]
        private void OnStartOfDay(object sender, EventArgs e)
        {
            //Can we irrigate today?          
            SeasonIsOpen = isBetween(Clock.Today, StartDate, EndDate);

            //Is there a crop in the ground that needs irrigation?
            CropIsActive = false;
            if ((existingCrop != null) && (existingCrop.IsAlive))
                CropIsActive = true;
            //if ((existingCrop.Phenology.Stage >= 3.0) && (existingCrop.Phenology.Stage < 6.0))
          
            //Is the irrigator available?
            IrrigatorIsAvailable = false;
            DaysSinceIrrigation += 1;
            if (DaysSinceIrrigation >= returndays)
                IrrigatorIsAvailable = true;
          
            //Is the soil dry enough to require irrigation?
            SoilIsDry = false;
            double depthFromSurface = 0.0;
            double fracLayer = 0.0;
            TopSWC = 0.0;
            for (int layer = 0; layer < nLayers; layer++)
            {
                fracLayer = Math.Min(1.0, (depthPAWC - depthFromSurface) / Soil.Thickness[layer]);
                TopSWC += Soil.SoilWater.SWmm[layer] * fracLayer;
                depthFromSurface += Soil.Thickness[layer];
                if (depthFromSurface >= depthPAWC)
                    layer = nLayers;
            }
            
            TopSWdeficit = TopSWC - TopDUL;
            if (Math.Max(0.0, -TopSWdeficit) >= (TopDUL - TopLL) * (100 - triggerDeficit) / 100)
                SoilIsDry = true;
                
            //Are all the conditions ratifying irrigation
            if (IrrigationIsAllowed && SeasonIsOpen && CropIsActive && IrrigatorIsAvailable && SoilIsDry)
            {
                //Lets bloody well irrigate then!!!!
                AmountToApply = TopDUL * targetDeficit / 100 - TopSWC;
                //AmountToApply = Math.Max(0.0, Math.Min(AmountToApply, seasonsAllocation - SeasonAppliedAmount));
                AmountToApply = maximumAmount;
                Irrigation.Apply(AmountToApply);
                DaysSinceIrrigation = 0;
                SeasonAppliedAmount += AmountToApply;
            }
        }
        
        ///Checks whether theDate is between iniDate and endDate (non-year specific)
        private bool isBetween(DateTime theDay, DateTime iniDate, DateTime endDate)
        {
            bool result = false;
            if (iniDate.DayOfYear < endDate.DayOfYear)
            {
                // period is within one year, ex: summer in the northern hemisphere
                if ((theDay.DayOfYear >= iniDate.DayOfYear) && (theDay.DayOfYear <= endDate.DayOfYear))
                    result = true;
            }
            else
            {
                // period goes over the end of the year, ex: summer in the southern hemisphere
                if ((theDay.DayOfYear >= iniDate.DayOfYear) || (theDay.DayOfYear <= endDate.DayOfYear))
                    result = true;
            }
            
            return result;
        }
    }
}
```
      Manager Fertilise on fixed dates
        EachYear = True
        Dates = 20-sep,20-nov,20-jan,20-mar
        UseCritNThreshold = False
        CritNThreshold = 50
        CritNDepth = 75
        Depth = 50
        Amount = 30
        FertiliserType = UreaN
```csharp
using System;
using Models.Core;
using Models.Soils;
using Models.Soils.Nutrients;
using Models.PMF;
using APSIM.Shared.Utilities;
using System.Linq;

namespace Models
{
    [Serializable]
    public class Script : Model
    {
        [Link] Clock clock;
        [Link] Fertiliser fertiliser;
        [Link] ISummary summary;
        [Link] Soil soil;

        private Nutrient nutrient;
        private SoilNitrogen soilN;

        [Separator("Fertiliser will be applied on the date(s) below")]
        [Description("Apply fertiliser on the same day(s) each year? If no, then must include the year of appliaction below")]
        public bool EachYear { get; set; }

        [Description("Dates for one or more fertiliser applications (dd-mmm or dd-mmm-yyyy) as a list with a comma between dates")]
        public string[] Dates { get; set; }

        [Separator("Test for the mineral N in the soil and don't apply the fertiliser if greater than X kgN/ha is stored in the soil above a depth of Y mm")]
        [Description("Use a critical soil mineral N to prevent application above a threshold?")]
        public bool UseCritNThreshold { get; set; }

        [Description("Don't add fertiliser if N in the soil to the depth below exceeds (kg/ha)")]
        public double CritNThreshold { get; set; }

        [Description("Depth to which the amount of N in the soil should be calculated (mm)")]
        public double CritNDepth { get; set; }

        [Separator("Fertiliser application details")]
        [Description("Depth at which to apply the fertiliser (mm)")]
        public double Depth { get; set; }

        [Description("Amount of fertiliser to apply (kg N /ha) per application")]
        public double Amount { get; set; }

        [Description("Fertiliser type - select from the list")]
        public Fertiliser.Types FertiliserType { get; set; }


        [EventSubscribe("StartOfSimulation")]
        private void FindSoilNOrNutrient(object sender, EventArgs e)
        {
            nutrient = Apsim.Find(this, typeof(Nutrient)) as Nutrient;
            soilN = Apsim.Find(this, typeof(SoilNitrogen)) as SoilNitrogen;

            if (nutrient == null && soilN == null)
                throw new Exception(string.Format("Error in script {0}: Unable to find nutrient or soilN.", Name));
        }

        [EventSubscribe("DoManagement")]
        private void OnDoManagement(object sender, EventArgs e)
        {
            if (OnApplicationDate())
            {
                if (NContentBelowThreshold())
                    fertiliser.Apply(Amount, FertiliserType, Depth);
                else
                    summary.WriteMessage(this, "Skipping fertiliser application due to soil mineral N content being above critical threshold.");
            }
        }

        /// <summary>Checks if today's date is one of the specified fertiliser application dates.</summary>
        private bool OnApplicationDate()
        {
            if (EachYear)
                return Dates.Any(d => DateUtilities.DatesEqual(d, clock.Today));
            
            DateTime[] dates = Dates.Select(d => DateTime.ParseExact(d, "d-MMM-yyyy", null)).ToArray();
            return dates.Any(d => SameDate(d, clock.Today));
        }

        /// <summary>Checks if N content in soil is below critical threshold.</summary>
        private bool NContentBelowThreshold()
        {
            if (!UseCritNThreshold)
                return true;
            
            double[] weights = GetLayerWeights();
            double cumSoilN = 0;

            for (int i = 0; i < soil.Thickness.Length; i++)
            {
                if (nutrient != null)
                    cumSoilN += weights[i] * nutrient.MineralN[i];
                else if (soilN != null)
                    cumSoilN += weights[i] * soilN.mineral_n[i];
            }

            return cumSoilN <= CritNThreshold;
        }

        private double[] GetLayerWeights()
        {
            double[] weights = new double[soil.Thickness.Length];
            double cumDepth = 0;

            for (int i = 0; i < soil.Thickness.Length; i++)
            {
                cumDepth += soil.Thickness[i];
                if (cumDepth < CritNDepth)
                    weights[i] = 1;
                else if (cumDepth - soil.Thickness[i] <= CritNDepth)
                    weights[i] = (CritNDepth - (cumDepth - soil.Thickness[i])) / soil.Thickness[i];
                else
                    weights[i] = 0;
            }

            return weights;
        }

        private bool SameDate(DateTime d1, DateTime d2)
        {
            return d1.Year == d2.Year && d1.DayOfYear == d2.DayOfYear;
        }
    }
}
```
      Irrigation
      Fertiliser
      SurfaceOrganicMatter: InitialResidueName=grass; InitialResidueType=grass; InitialResidueMass=500; InitialStandingFraction=0; InitialCPR=0; InitialCNR=40; FractionFaecesAdded=0.5
      Soil: SoilType=Generic medium texture; Region=Canterbury; Country=New Zealand; Latitude=0; Longitude=0
        Chemical
          Thickness  NO3N      NH4N       PH
          150        9.43396   0.377358   6
          150        6.59293   0.240729   6
          200        3.6821    0.113604   6
          250        2.19178   0.0547945  6
          250        2.19178   0.0547945  6
          500        0.740741  0.0296296  6
        Physical
          Thickness  ParticleSizeClay  BD    AirDry  LL15  DUL   SAT   KS
          150        20                1.3   0.05    0.15  0.36  0.45  4500
          150        20                1.4   0.17    0.17  0.34  0.42  2500
          200        20                1.5   0.19    0.19  0.33  0.38  200
          250        15                1.6   0.17    0.17  0.3   0.36  1500
          250        10                1.45  0.1     0.1   0.2   0.38  5000
          500        10                1.35  0.1     0.1   0.2   0.39  10000
          SoilCrop PlantainSoil: LL=[0.15, 0.17, 0.19, 0.17, 0.1, 0.1]; KL=[0.1, 0.08, 0.05, 0.02, 0.01, 0.01]; XF=[1, 1, 1, 1, 1, 0.5]
        SoilWater: SummerDate=21-Sep; SummerU=6; SummerCona=3.5; WinterDate=23-Mar; WinterU=6; WinterCona=2.5; DiffusConst=88; DiffusSlope=35; Salb=0.2; CN2Bare=0.7; CNRed=20; CNCov=0.8; max_pond=0; Thickness=[150, 150, 200, 250, 250, 500]; SWCON=[0.45, 0.35, 0.1, 0.15, 0.3, 0.2]; PrecipitationInterception=0
        SoilNitrogen: fom_types=[default, manure, mucuna, lablab, shemp, stable]; fract_carb=[0.2, 0.3, 0.54, 0.57, 0.45, 0]; fract_cell=[0.7, 0.3, 0.37, 0.37, 0.47, 0.1]; fract_lign=[0.1, 0.4, 0.09, 0.06, 0.08, 0.9]
          SoilNitrogenNO3 NO3
          SoilNitrogenNH4 NH4
          SoilNitrogenUrea Urea
          SoilNitrogenPlantAvailableNO3 PlantAvailableNO3
          SoilNitrogenPlantAvailableNH4 PlantAvailableNH4
        Organic: FOMCNRatio=40
          Thickness  Carbon  SoilCNRatio  FBiom  FInert  FOM
          150        2.5     12           0.04   0.4     358.617
          150        1.25    12           0.025  0.6     265.67
          200        0.5     12           0.015  0.8     178.084
          250        0.2     12           0.01   0.9     108.013
          250        0.15    12           0.008  0.95    65.5135
          500        0.1     12           0.008  0.98    24.1011
        InitialWater Initial water: PercentMethod=1; FractionFull=0.9
        Sample Initial nitrogen: Thickness=[200, 200, 600, 500]; SWUnits=Volumetric; OCUnits=Total; PHUnits=Water
        CERESSoilTemperature
      Plant Plantain: CropType=Plantain; IsEnding=false; DaysAfterEnding=0
  Simulation A Simple Rotational Grazing
    Memo
      (next script add more complexity to animal trading) - this would be a good thing to do!
    Clock: Start=2001-10-01; End=2003-09-30
    Summary SummaryFile
    SoilArbitrator
    MicroClimate: a_interception=0; b_interception=0; c_interception=0; d_interception=0; soil_albedo=0.23; SoilHeatFluxFraction=0.4; NightInterceptionFraction=0.5; ReferenceHeight=2
    Weather: FileName=%root%\Examples\WeatherFiles\lincoln.met
    Stock: RandSeed=9999
      PaddockList:
        {Area=1, Slope=0}
    Supplement: SpoilageTime=0
      Stores:
        Name                Stored  IsRoughage  DMContent  DMD   MEContent  CPConc  ProtDg  PConc   SConc   EEConc  ADIP2CP  AshAlk  MaxPassage
        fodder              0       true        0.85       0     0          0       0       0       0       0       0        0       0
        silage_highquality  0       true        1          0.85  12         0.16    0.7     0.0032  0.0024  0.02    0.06     0.6     0
    Manager TargetRotationLength
      DoVerbose = False
      StockingRate = 5
      CurrentLocationName = [Paddock01]
      TargetRotationLength = 40
      PostGrazingResidual = 2800
      PostCuttingResidual = 1800
      HarvestExcessHerbage = True
      SilageEveryDay = 0
      SilageOnPastureMass = 15
      TriggerPastureMass = 2000
      NumCows = 3
      pastLocationName =
      newLocationName =
      CurrentLocationNum = 0
      NumPaddocks = 0
      listOfPaddockInfo =
```csharp
using System;
using Models.Core;
using Models.Utilities;
using Models.GrazPlan;
using APSIM.Shared.Utilities;
using System.Xml.Serialization;
using Models.PMF;
using Models.Soils;
using System.Collections;
using System.Collections.Generic;
using Models.AgPasture;
using System.Diagnostics;

namespace Models
{

    [Serializable]
    public class Script : Model
    {
        [Link] Clock Clock;
        [Link] Stock Cows;
        [Link] Supplement Supplement;
        [Link] Zone[] Paddocks;
        [Link] ISummary summary = null;
        [Link] Simulation Farm;

        //List<AgPasture.PastureSpecies> Pasture = new List<AgPasture.PastureSpecies>();

        [Serializable]
        public class PaddockInfo
        {
            public string paddockName;
            public double totalBiomass;
            public double harvestableBiomass;
            public int paddockNum;
            public double paddockArea;
        }

        [Description("Do verbose reporting from this script (tick for yes): ")] 
        public bool DoVerbose { get; set; }

        [Separator("Whole farm and initial location")]

        [Description("Whole-farm stocking rate (head/ha): ")] 
        public double StockingRate { get; set; } 

        //[Description("Initial location of the cows (paddock name): ")] 
        //public string CurrentLocationName { get; set; }
        [Description("Initial location of the cows (paddock name):")] 
		[Display(Type=DisplayType.Model, ModelType=typeof(Zone))]
		public IModel CurrentLocationName { get; set; }

        [Separator("Settings for the rotation")]

        [Description("Target rotation length (days/paddock): ")] 
        public int TargetRotationLength { get; set; }

        [Description("Post-grazing residual to trigger pasture conservation (kgDM/ha): ")] 
        public double PostGrazingResidual { get; set; }

        [Description("Post-cutting residual (kgDM/ha): ")] 
        public double PostCuttingResidual { get; set; }

        [Description("Harvest excess herbage above residual when cows leave the paddock?: ")] 
        public bool HarvestExcessHerbage { get; set; }

        [Separator("Settings for supplementary feeding")]

        [Description("Baseline (i.e. every day) feeding of silage (kgDM/head/day): ")] 
        public double SilageEveryDay { get; set; }

        [Description("Low pre-grazing pasture mass feeding (additional to baseline) of silage (kgDM/head/day): ")] 
        public double SilageOnPastureMass { get; set; }

        [Description("Trigger pre-grazing pasture mass for the rule above (kgDM/ha): ")] 
        public double TriggerPastureMass { get; set; }

        public int NumCows { get; set; } // number of cows on the whole farm
        public string pastLocationName { get; set; }  // name of the paddock that the cows are currently in
        public string newLocationName { get; set; }  // name of the paddock that the cows are currently in
        public int CurrentLocationNum { get; set; }  // name of the paddock that the cows are currently in
        public int NumPaddocks { get; set; }
        //public double[] HarvestableBiomass { get; set; }

        private int group_count; // how many groups are there in the simulation
        private int g = 1;      // index to the groups of animals

        //private int DaysPerPaddock;
        private int DaysInThisPaddock;
        private bool MoveToday = false;
        public double BiomassInCurrentPaddock;

        public event BiomassRemovedDelegate BiomassRemoved;
        public List<PaddockInfo> listOfPaddockInfo { get; set; }


        [EventSubscribe("StartOfSimulation")]
        private void OnStartOfSimulation(object sender, EventArgs e)
        {
            summary.WriteMessage(this, "Initialising the paddock information");
            listOfPaddockInfo = new List<PaddockInfo>();


            GetPaddockInfo();
            //HarvestableBiomass = Farm.

            NumCows = (int)(Math.Round(StockingRate * Farm.Area, 0));

            SetInitialCowStuff();

            if (NumCows > 0)
                Cows.Move(g, CurrentLocationName.Name);

            summary.WriteMessage(this, "     The number of animals has been rounded to " + NumCows + " from " + (StockingRate * Farm.Area));
            summary.WriteMessage(this, "     The animals will begin in " + CurrentLocationName + " which is paddock number " + CurrentLocationNum + " in the simulation");
            summary.WriteMessage(this, "     The area of the whole farm is " + Farm.Area + " ha");

            DaysInThisPaddock = -1;
        }

        [EventSubscribe("DoManagement")]
        private void OnDoManagement(object sender, EventArgs e)
        {
            UpdatePaddockInfo();

            // WTF is this?
            if ((Cows.LactatingAll > 2) && (Cows.NoSucklingAll > 0))
                WeanCalves();
            if ((Cows.LactatingAll > 4) && (Cows.LactatingAll < 6))
                SellCalves();

            MoveToday = false;
            // how many days in this paddock?  Ready to move?
            DaysInThisPaddock += 1;
            if (DaysInThisPaddock >= TargetRotationLength)
            {
                MoveToday = true;

                pastLocationName = CurrentLocationName.Name.ToString();
                if (CurrentLocationNum < NumPaddocks - 1)
                {
                    CurrentLocationNum += 1;
                    newLocationName = listOfPaddockInfo[CurrentLocationNum].paddockName;
                }
                else
                {
                    CurrentLocationNum = 0;
                    newLocationName = listOfPaddockInfo[CurrentLocationNum].paddockName;
                }
                CurrentLocationName.Name = listOfPaddockInfo[CurrentLocationNum].paddockName;


                if (HarvestExcessHerbage)
                {
                    foreach (Zone paddock in Paddocks)
                    {
                        if (paddock.Name == pastLocationName)
                        {
                            double pastPaddockBiomass = 0.0;
                            foreach (PastureSpecies plant in Apsim.Children(paddock, typeof(PastureSpecies)))
                                pastPaddockBiomass += plant.AboveGroundWt;
                            if (pastPaddockBiomass > PostGrazingResidual)  //why the 250? Because don't harvest very small amounts ...
                            {
                                foreach (PastureSpecies plant in Apsim.Children(paddock, typeof(PastureSpecies)))
                                    plant.Graze(amount: (plant.AboveGroundWt / pastPaddockBiomass * PostCuttingResidual), type: "SetResidueAmount");  

                            }
                        }
                    }
                }

                if (NumCows > 0)
                    Cows.Move(g, listOfPaddockInfo[CurrentLocationNum].paddockName);

                if (DoVerbose)
                    summary.WriteMessage(this, "moving Stock to " + listOfPaddockInfo[CurrentLocationNum].paddockName);

                DaysInThisPaddock = 0;
            }

            if (SilageEveryDay > 0)
            {
            // see how much supplement there is - buy more if needed
            // Stores 1 is from a pasture component so bought supplements start at 2
                double silageOnHand = Supplement.Stores[2 - 1].Stored;
                if (silageOnHand < SilageEveryDay * Cows.NumberAll)
                {
                    Supplement.Buy(SilageEveryDay * 180 * Cows.NumberAll, "silage_highquality");  // i.e. 6 months worth
                    summary.WriteMessage(this, "SilageEveryDay: Buying silage_highquality of total amount : " + (SilageEveryDay * 180 * Cows.NumberAll) + " kg DM");
                }
                Supplement.Feed("silage_highquality", SilageEveryDay * Cows.NumberAll, CurrentLocationName.Name, false);
            }

            if ((SilageOnPastureMass > 0) && (listOfPaddockInfo[CurrentLocationNum].harvestableBiomass < TriggerPastureMass))
            {
                double silageOnHand = Supplement.Stores[2 - 1].Stored;
                if (silageOnHand < SilageOnPastureMass * Cows.NumberAll)
                {
                    Supplement.Buy(SilageOnPastureMass * 180 * Cows.NumberAll, "silage_highquality");
                    summary.WriteMessage(this, "SilageOnPastureMass: Buying silage_highquality of total amount : " + (SilageOnPastureMass * 180 * Cows.NumberAll) + " kg DM");
                }
                Supplement.Feed("silage_highquality", SilageOnPastureMass * Cows.NumberAll, CurrentLocationName.Name, false);
            }

            // capture the pre-grazing biomass before the DoStock event
            BiomassInCurrentPaddock = listOfPaddockInfo[CurrentLocationNum].harvestableBiomass;

        } // End of Do Management

        [EventSubscribe("DoReportCalculations")]
        private void DoManagementCalculations(object sender, EventArgs e)
        {
            //this is after Stock have eaten
            UpdatePaddockInfo();


        }

        public void SetInitialCowStuff()
        {
            if (NumCows > 0)
            {
                g = Cows.NoGroups + 1;

                StockBuy purchase = new StockBuy();
                purchase.Genotype = "Angus";
                purchase.Number = NumCows;
                purchase.Sex = "steers";
                purchase.Age = 36;       // age in months
                purchase.Weight = 600.0;  // live weight in kg
                purchase.UseTag = g + 1;
                purchase.MatedTo = "Angus";
                purchase.Pregnant = 0;  // days pregnant, 0 = non pregnant, 1 = pregnant
                purchase.Lactating = 0;  // 0 for dry, 1 for lactating
                purchase.NumYoung = 0;
                purchase.YoungWt = 0;

                Cows.Buy(purchase);
            }
        }

        public void WeanCalves()
        {
                StockWean weanData = new StockWean();
                weanData.Group = 0;
                weanData.Sex = "all";
                weanData.Number = Cows.NumberAll;

                Cows.Wean(weanData);
        }

        public void SellCalves()
        {
                double weanAge = 0.25 * 365;
                int NumGroups = Cows.NoGroups;

              for (int gg = 1; gg <= NumGroups; gg++)
              {
                  StockSplit split = new StockSplit();
                  split.Group = gg;
                  split.Type = "age";
                  split.Value = weanAge;  

                Cows.Split(split);
              }

              NumGroups = Cows.NoGroups;
              for (int gg = 1; gg <= NumGroups; gg++)
              {
                if (Cows.Age[gg - 1] < weanAge)
                      Cows.Sell(gg, Cows.Number[gg - 1]);
              }


        }


        public void GetPaddockInfo()
        {
            NumPaddocks = 0;
            CurrentLocationNum = 0;

            foreach (Zone paddock in Paddocks)
            {
                NumPaddocks += 1;

                PaddockInfo paddockInfo = new PaddockInfo();

                paddockInfo.paddockName = paddock.Name;
                paddockInfo.paddockNum = NumPaddocks - 1;
                paddockInfo.paddockArea = paddock.Area;

                foreach (PastureSpecies plant in Apsim.Children(paddock, typeof(PastureSpecies)))
                {
                    paddockInfo.harvestableBiomass += plant.HarvestableWt;
                    paddockInfo.totalBiomass += plant.AboveGroundWt;
                }


                listOfPaddockInfo.Add(paddockInfo);

                if (paddock.Name == CurrentLocationName.Name)
                    CurrentLocationNum = paddockInfo.paddockNum;

                summary.WriteMessage(this, "     Paddock " + NumPaddocks + " is called " + paddock.Name + ", has an area of " + paddock.Area + " ha and an initial harvestable biomass of " + paddockInfo.harvestableBiomass + " kg DM / ha");

            }

        }

        public void UpdatePaddockInfo()
        {
            int ii = -1;

            foreach (Zone paddock in Paddocks)
            {
                ii += 1;
                listOfPaddockInfo[ii].harvestableBiomass = 0.0;
                foreach (PastureSpecies plant in Apsim.Children(paddock, typeof(PastureSpecies)))
                {
                    listOfPaddockInfo[ii].harvestableBiomass += plant.HarvestableWt;
                    listOfPaddockInfo[ii].totalBiomass += plant.AboveGroundWt;
                }

            }

        }


    }
}
```
    Report ReportFarm: EventNames=[Clock].EndOfDay
      VariableNames:
        [Clock].Today
        [TargetRotationLength].Script.listOfPaddockInfo[1].harvestableBiomass as PaddockInfo
        [TargetRotationLength].Script.CurrentLocation as CurrentLoc
        [TargetRotationLength].Script.CurrentLocationNum as CurrentLocNum
        [Stock].PastIntakeAll.Weight as IntakePast
        [Stock].SuppIntakeAll.Weight as IntakeSupp
        [Stock].IntakeAll.Weight as IntakePastSupp
        [Stock].Paddock as StockInPaddockName
        [TargetRotationLength].Script.CurrentLocationNum as StockInPaddockNum
        [Stock].NumberAll
        [Stock].BaseWtAll
        [Stock].CondScoreAll
        [Stock].IntakeAll.Weight * [Stock].NumberAll as TotalIntake
        //([Paddock00].AGPRyegrass.HerbageGrowthWt + [Paddock00].AGPWhiteClover.HerbageGrowthWt) * [Paddock00].Area + ([Paddock01].AGPRyegrass.HerbageGrowthWt + [Paddock01].AGPWhiteClover.HerbageGrowthWt) * [Paddock01].Area + ([Paddock02].AGPRyegrass.HerbageGrowthWt + [Paddock02].AGPWhiteClover.HerbageGrowthWt) * [Paddock02].Area as TotalGrowth
        [Supplement].Stores[2].Stored
        [Stock].Paddock
    Zone Paddock01: Area=10; Slope=0; AspectAngle=0; Altitude=50
      Manager AutomaticIrrigation
        allowIrrigation = True
        seasonStart = 15-Aug
        seasonEnd = 30-May
        seasonsAllocation = 10000
        triggerDeficit = 85
        targetDeficit = 99
        returndays = 1
        maximumAmount = 30
        depthPAWC = 300
```csharp
using System;
using Models.Core;
using Models.PMF;
using Models.Soils;
using System.Xml.Serialization;
using Models.PMF;
using APSIM.Shared.Utilities;

        
namespace Models
{
    [Serializable] 
    [System.Xml.Serialization.XmlInclude(typeof(Model))]
    public class Script : Model
    {
        //Communication to other modules
        [Link] ISummary summary = null;
        [Link] Irrigation Irrigation;
        [Link] Clock Clock;
        [Link] Soil Soil;
        [Link(IsOptional = true)] IPlant existingCrop;
       
        //User inputs from properties tab
        [Description("Turn irrigation on?")]
        public bool allowIrrigation { get; set; }
        [Description("Start of irrigation season (dd-MMM)")]
        public string seasonStart { get; set; }
        [Description("End of irrigation season (dd-MMM)")]
        public string seasonEnd { get; set; }
        [Description("Season allocation (mm)")]
        public double seasonsAllocation { get; set; }
        [Description("Deficit to trigger irrigation (% PAWC)")]
        public double triggerDeficit { get; set; }
        [Description("Deficit to stop irrigaton (% PAWC)")]
        public double targetDeficit { get; set; }
        [Description("Minimum days for irrigation to return")]
        public double returndays { get; set; }
        [Description("Maximum irrigation application (mm/day)")]
        public double maximumAmount { get; set; }
        [Description("Depth to calculate PAWC (mm)")]
        public double depthPAWC { get; set; }

        //Class members
        [XmlIgnore] public double TopSWdeficit { get; set; }
        [XmlIgnore] public double TopSWC { get; set; }
        [XmlIgnore] public double DaysSinceIrrigation { get; set; }
        [XmlIgnore] public double AmountToApply { get; set; }
        [XmlIgnore] public double SeasonAppliedAmount { get; set; }
        
        private bool IrrigationIsAllowed { get; set; }
        private bool SeasonIsOpen { get; set; }
        private bool CropIsActive { get; set; }
        private bool IrrigatorIsAvailable { get; set; }
        private bool SoilIsDry { get; set; }

        private DateTime StartDate;
        private DateTime EndDate;
        private double TopDUL;
        private double TopLL;
        private int nLayers;
    
        //Calculate static soil variables
        [EventSubscribe("StartOfSimulation")]
        private void OnStartOfSimulation(object sender, EventArgs e)
        {   
            //Set the season dates
            StartDate = DateTime.Parse(seasonStart + "-" + Clock.Today.Year.ToString());
            EndDate = DateTime.Parse(seasonEnd + "-" + Clock.Today.Year.ToString());
            
            //Can we irrigate at all?
            IrrigationIsAllowed = false; 
            if (allowIrrigation)
                IrrigationIsAllowed = true; 

            //Calculate soil water variables
            double depthFromSurface = 0.0;
            double fracLayer = 0.0;
            nLayers = Soil.Thickness.Length;
            for (int layer = 0; layer < nLayers; layer++)
            {
                fracLayer = Math.Min(1.0, (depthPAWC - depthFromSurface) / Soil.Thickness[layer]);
                TopLL += Soil.LL15mm[layer] * fracLayer;
                TopDUL += Soil.DULmm[layer] * fracLayer;
                depthFromSurface += Soil.Thickness[layer];
                if (depthFromSurface >= depthPAWC)
                    layer = nLayers;
            }
        }
             
        //Determine daily requirement for irrigation
        [EventSubscribe("StartOfDay")]
        private void OnStartOfDay(object sender, EventArgs e)
        {
            //Can we irrigate today?          
            SeasonIsOpen = isBetween(Clock.Today, StartDate, EndDate);

            //Is there a crop in the ground that needs irrigation?
            CropIsActive = false;
            if ((existingCrop != null) && (existingCrop.IsAlive))
                CropIsActive = true;
            //if ((existingCrop.Phenology.Stage >= 3.0) && (existingCrop.Phenology.Stage < 6.0))
          
            //Is the irrigator available?
            IrrigatorIsAvailable = false;
            DaysSinceIrrigation += 1;
            if (DaysSinceIrrigation >= returndays)
                IrrigatorIsAvailable = true;
          
            //Is the soil dry enough to require irrigation?
            SoilIsDry = false;
            double depthFromSurface = 0.0;
            double fracLayer = 0.0;
            TopSWC = 0.0;
            for (int layer = 0; layer < nLayers; layer++)
            //for (int layer = 0; depthFromSurface < depthPAWC + Soil.Thickness[layer]; layer++)
            {
                fracLayer = Math.Min(1.0, (depthPAWC - depthFromSurface) / Soil.Thickness[layer]);
                TopSWC += Soil.SoilWater.SWmm[layer] * fracLayer;
                depthFromSurface += Soil.Thickness[layer];
                if (depthFromSurface >= depthPAWC)
                    layer = nLayers;
            }
            
            TopSWdeficit = TopSWC - TopDUL;
            if (Math.Max(0.0, -TopSWdeficit) >= (TopDUL - TopLL) * (100 - triggerDeficit) / 100)
                SoilIsDry = true;
                
            //Are all the conditions ratifying irrigation
            if (IrrigationIsAllowed && SeasonIsOpen && CropIsActive && IrrigatorIsAvailable && SoilIsDry)
            {
                //Lets bloody well irrigate then!!!!
                AmountToApply = TopDUL * targetDeficit / 100 - TopSWC;
                AmountToApply = Math.Max(0.0, Math.Min(AmountToApply, seasonsAllocation - SeasonAppliedAmount));
                Irrigation.Apply(AmountToApply);
                DaysSinceIrrigation = 0;
                SeasonAppliedAmount += AmountToApply;
            }
        }
        
        ///Checks whether theDate is between iniDate and endDate (non-year specific)
        private bool isBetween(DateTime theDay, DateTime iniDate, DateTime endDate)
        {
            bool result = false;
            if (iniDate.DayOfYear < endDate.DayOfYear)
            {
                // period is within one year, ex: summer in the northern hemisphere
                if ((theDay.DayOfYear >= iniDate.DayOfYear) && (theDay.DayOfYear <= endDate.DayOfYear))
                    result = true;
            }
            else
            {
                // period goes over the end of the year, ex: summer in the southern hemisphere
                if ((theDay.DayOfYear >= iniDate.DayOfYear) || (theDay.DayOfYear <= endDate.DayOfYear))
                    result = true;
            }
            
            return result;
        }
    }
}
```
      Manager AutomaticFertiliser
        AllowFertiliser = yes
        Depth2SoilN = 500
        CriticalSoilN = 5
        FertNAmount = 25
        FertType = UreaN
        FertApplicationDepth = 1
        FertMinimumDays = 15
```csharp
using Models.Interfaces;
using System.Xml.Serialization;
using APSIM.Shared.Utilities;
using Models.Soils;
using Models.PMF;
using Models.Core;
using System;

namespace Models
{
    [Serializable]
    public class Script : Model
    {
        [Link] private Clock Clock;
        [Link] private Fertiliser fertiliser;
        [Link] private ISummary summary;
        [Link] private Soil Soil;
        private DateTime lastApplicationDate;
        private bool fertiliserIsAllowed;
        private int nLayers;
        [Link(ByName = true)]
        private ISolute NO3;
        [Link(ByName = true)]
        private ISolute NH4;
        [Link(ByName = true)]
        private ISolute Urea;

        //User inputs from properties tab
        [Description("Turn ferliser applications on? ")]
        public yesnoType AllowFertiliser { get; set; }
        
        [Description("Depth to calculate available soil N (mm): ")]
        public double Depth2SoilN { get; set; }

        [Description("Minimum available N, triggers an application (kgN/ha): ")]
        public double CriticalSoilN { get; set; }

        [Description("Amount of N fertiliser for each application (kgN/ha): ")]
        public double FertNAmount { get; set; }

        [Description("Type of N fertiliser to apply: ")]
        public Fertiliser.Types FertType { get; set; }

        [Description("Depth at which to apply the fertiliser (mm): ")]
        public double FertApplicationDepth { get; set; }
       
        [Description("Minimum period between applications (days): ")]
        public double FertMinimumDays { get; set; }
       
        public enum yesnoType
        {
            /// <summary>a positive answer</summary>
            yes,
            /// <summary>a negative answer</summary>
            no
        }

        [XmlIgnore] public double TopMineralN { get; set; }
        

        [EventSubscribe("StartOfSimulation")]
        private void OnStartOfSimulation(object sender, EventArgs e)
        {
            fertiliserIsAllowed = (AllowFertiliser == yesnoType.yes);
            nLayers = Soil.Thickness.Length;
        }

        [EventSubscribe("DoManagement")]
        private void OnDoManagement(object sender, EventArgs e)
        {
            double daysSinceLastApplication = (Clock.Today - lastApplicationDate).TotalDays;
            
            // get the N stored in the soil
            double depthFromSurface = 0.0;
            double fracLayer = 0.0;
            TopMineralN = 0.0;
            for (int layer = 0; layer < nLayers; layer++)
            {
                fracLayer = Math.Min(1.0, (Depth2SoilN - depthFromSurface) / Soil.Thickness[layer]);
                TopMineralN += (NO3.kgha[layer]
                + NH4.kgha[layer]
                + Urea.kgha[layer])
                * fracLayer;
                depthFromSurface += Soil.Thickness[layer];
                if (depthFromSurface >= Depth2SoilN)
                    layer = nLayers;
            }

            if (fertiliserIsAllowed && (daysSinceLastApplication >= FertMinimumDays) && (TopMineralN <= CriticalSoilN))
            {
                fertiliser.Apply(FertNAmount, FertType, FertApplicationDepth);
                lastApplicationDate = Clock.Today;
            }
        }
    }
}
```
      Manager Fertilise on fixed dates
        EachYear = True
        Dates = 20-aug,20-sep,20-oct,20-nov,20-dec,20-jan,20-feb,20-mar,20-apr
        UseCritNThreshold = False
        CritNThreshold = 50
        CritNDepth = 75
        Depth = 50
        Amount = 25
        FertiliserType = UreaN
        script: same as in Forage Crop Grazing.Field.Fertilise on fixed dates
      Irrigation
      Fertiliser
      SurfaceOrganicMatter: InitialResidueName=Sward; InitialResidueType=grass; InitialResidueMass=1000; InitialStandingFraction=0; InitialCPR=0; InitialCNR=15; FractionFaecesAdded=0.5
      PastureSpecies AGPRyegrass: Albedo=0.26; Gsmax=0.011; R50=200; InitialShootDM=1500; InitialRootDM=450; InitialRootDepth=750; initialDMFractionsGrasses=[0.15, 0.25, 0.25, 0.05, 0.05, 0.1, 0.1, 0.05, 0, 0, 0]; initialDMFractionsForbs=[0.2, 0.2, 0.15, 0.05, 0.1, 0.15, 0.1, 0.05, 0, 0, 0]; ReferencePhotosyntheticRate=1; LightExtinctionCoefficient=0.5; GrowthTminimum=1; GrowthToptimum=20; GrowthTEffectExponent=1.7; HeatOnsetTemperature=28; HeatFullTemperature=35; HeatRecoverySumDD=30; HeatRecoveryTReference=25; ColdOnsetTemperature=1; ColdFullTemperature=-5; ColdRecoverySumDD=25; MaintenanceRespirationCoefficient=0.03; GrowthRespirationCoefficient=0.25; RespirationTReference=20; NThresholdsForLeaves=[0.04, 0.012, 0.05]; NThresholdsForStems=[0.02, 0.006, 0.025]; NThresholdsForStolons=[0, 0, 0]; NThresholdsForRoots=[0.02, 0.006, 0.025]; DegreesDayForGermination=125; TargetShootRootRatio=4; MaxRootAllocation=0.25; ShootRootGlfFactor=0.5; ReproSeasonReferenceLatitude=41; ReproSeasonTimingCoeff=0.14; ReproSeasonMaxAllocationIncrease=0.5; ReproSeasonAllocationCoeff=0.1; FractionLeafMaximum=0.7; FractionLeafMinimum=0.7; FractionLeafDMThreshold=500; FractionLeafDMFactor=2000; FractionLeafExponent=3; SpecificLeafArea=20; SpecificRootLength=100; ShootMaxEffectOnLAI=1000; MaxStemEffectOnLAI=1; LiveLeavesPerTiller=3; TissueTurnoverRateShoot=0.05; TissueTurnoverRateRoot=0.02; DetachmentRateShoot=0.08; TurnoverTemperatureMin=2; TurnoverTemperatureRef=20; TurnoverTemperatureExponent=1; TurnoverDroughtEffectMax=1; TurnoverDroughtThreshold=0.5; TurnoverDefoliationCoefficient=0.5; TurnoverDefoliationRootEffect=0.1; FractionNLuxuryRemobilisable=[0.1, 0.1, 0.1]; SoilSaturationEffectMax=0.1; MinimumWaterFreePorosity=-1; SoilSaturationRecoveryFactor=0.25; NDillutionCoefficient=0.25; GlfGeneric=1; GlfSoilFertility=1; PlantHeightMinimum=300; PlantHeightMaximum=300; PlantHeightMassForMax=10000; PlantHeightExponent=2.8; RootDepthMinimum=50; RootDepthMaximum=1000; RootElongationRate=25; RootDistributionDepthParam=250; RootDistributionExponent=3.2; RootBottomDistributionFactor=1.05; DigestibilitiesCellWall=[0.9, 0.7, 0.6, 0.2]; MinimumGreenWt=100; PreferenceForGreenOverDead=1; PreferenceForLeafOverStems=1; MaximumNUptake=10
        zero: LAI, SpeciesFamily, PhotosyntheticPathway, UseHeatStressFactor, UseColdStressFactor, ColdRecoveryTReference, UseReproSeasonFactor, FractionToStolon, StolonEffectOnLAI, MinimumNFixation, MaximumNFixation, SymbiontCostFactor, NFixingCostFactor, FractionStolonStanding, WaterAvailableMethod, NitrogenAvailableMethod, LAIGreen
        initialDMFractionsLegumes=[0.16, 0.23, 0.22, 0.05, 0.03, 0.05, 0.05, 0.01, 0.04, 0.08, 0.08]
      PastureSpecies AGPWhiteClover: Albedo=0.26; Gsmax=0.011; R50=200; SpeciesFamily=1; InitialShootDM=500; InitialRootDM=150; InitialRootDepth=350; initialDMFractionsGrasses=[0.15, 0.25, 0.25, 0.05, 0.05, 0.1, 0.1, 0.05, 0, 0, 0]; initialDMFractionsForbs=[0.2, 0.2, 0.15, 0.05, 0.1, 0.15, 0.1, 0.05, 0, 0, 0]; ReferencePhotosyntheticRate=1; LightExtinctionCoefficient=0.8; GrowthTminimum=2; GrowthToptimum=22; GrowthTEffectExponent=1.7; HeatOnsetTemperature=30; HeatFullTemperature=36; HeatRecoverySumDD=20; HeatRecoveryTReference=25; ColdOnsetTemperature=2; ColdFullTemperature=-5; ColdRecoverySumDD=20; MaintenanceRespirationCoefficient=0.04; GrowthRespirationCoefficient=0.25; RespirationTReference=20; NThresholdsForLeaves=[0.045, 0.02, 0.055]; NThresholdsForStems=[0.0225, 0.01, 0.0275]; NThresholdsForStolons=[0.0225, 0.01, 0.0275]; NThresholdsForRoots=[0.0225, 0.01, 0.0275]; DegreesDayForGermination=125; TargetShootRootRatio=4; MaxRootAllocation=0.25; ShootRootGlfFactor=0.5; ReproSeasonReferenceLatitude=41; ReproSeasonTimingCoeff=0.14; ReproSeasonMaxAllocationIncrease=0.5; ReproSeasonAllocationCoeff=0.1; FractionLeafMaximum=0.56; FractionLeafMinimum=0.28; FractionLeafDMThreshold=500; FractionLeafDMFactor=2000; FractionLeafExponent=3; FractionToStolon=0.2; SpecificLeafArea=32; SpecificRootLength=45; StolonEffectOnLAI=0.3; ShootMaxEffectOnLAI=500; MaxStemEffectOnLAI=0.5; LiveLeavesPerTiller=3; TissueTurnoverRateShoot=0.05; TissueTurnoverRateRoot=0.02; DetachmentRateShoot=0.11; TurnoverTemperatureMin=2; TurnoverTemperatureRef=20; TurnoverTemperatureExponent=1; TurnoverDroughtEffectMax=1; TurnoverDroughtThreshold=0.5; TurnoverDefoliationCoefficient=0.5; TurnoverDefoliationRootEffect=0.1; FractionNLuxuryRemobilisable=[0.1, 0.1, 0.1]; MinimumNFixation=0.2; MaximumNFixation=0.6; SoilSaturationEffectMax=0.1; MinimumWaterFreePorosity=-1; SoilSaturationRecoveryFactor=0.25; NDillutionCoefficient=1; GlfGeneric=1; GlfSoilFertility=1; PlantHeightMinimum=300; PlantHeightMaximum=300; PlantHeightMassForMax=7500; PlantHeightExponent=2.5; RootDepthMinimum=30; RootDepthMaximum=350; RootElongationRate=25; RootDistributionDepthParam=70; RootDistributionExponent=2.5; RootBottomDistributionFactor=1.05; DigestibilitiesCellWall=[0.9, 0.8, 0.7, 0.2]; MinimumGreenWt=50; PreferenceForGreenOverDead=1; PreferenceForLeafOverStems=1; MaximumNUptake=10
        zero: LAI, PhotosyntheticPathway, UseHeatStressFactor, UseColdStressFactor, ColdRecoveryTReference, UseReproSeasonFactor, SymbiontCostFactor, NFixingCostFactor, FractionStolonStanding, WaterAvailableMethod, NitrogenAvailableMethod, LAIGreen
        initialDMFractionsLegumes=[0.16, 0.23, 0.22, 0.05, 0.03, 0.05, 0.05, 0.01, 0.04, 0.08, 0.08]
      Soil LismoreSoil: SoilType=NZ_Sedimentary; LocalName=Lismore; Site=Winchmore; NearestTown=Ashburton; Region=Canterbury; Country=New Zealand; Latitude=-48.48; Longitude=0
        Chemical
          Thickness  NO3N  NH4N  PH
          150        5     0.1   6
          150        2.5   0.1   6
          200        1     0.1   6
          150        0.75  0.1   6
          250        0.5   0.1   6
          300        0.5   0.1   6
          300        0.5   0.1   6
        Physical
          Thickness  ParticleSizeClay  BD    AirDry  LL15   DUL    SAT   KS
          150        20                1.3   0.05    0.15   0.36   0.45  5000
          150        15                1.35  0.12    0.14   0.34   0.43  2500
          200        12                1     0.055   0.055  0.19   0.25  3000
          150        8                 0.53  0.015   0.015  0.065  0.15  10000
          250        6                 0.31  0.01    0.01   0.04   0.11  17500
          300        5                 0.3   0.01    0.01   0.03   0.11  20000
          300        5                 0.3   0.01    0.01   0.03   0.11  20000
          SoilCrop AGPRyegrassSoil: LL=[0.15, 0.14, 0.06, 0.02, 0.01, 0.01, 0.01]; KL=[0.1, 0.1, 0.08, 0.04, 0.01, 0, 0]; XF=[1, 1, 1, 1, 1, 0, 0]
          SoilCrop AGPWhiteCloverSoil: LL=[0.15, 0.14, 0.06, 0.02, 0.01, 0.01, 0.01]; KL=[0.1, 0.1, 0.08, 0.04, 0.01, 0, 0]; XF=[1, 1, 1, 1, 1, 0, 0]
        SoilWater: SummerDate=1-Nov; SummerU=6; SummerCona=3.5; WinterDate=1-apr; WinterU=2; WinterCona=2; DiffusConst=88; DiffusSlope=35; Salb=0.13; CN2Bare=73; CNRed=20; CNCov=0.8; slope=0; discharge_width=0; catchment_area=0; max_pond=0; PrecipitationInterception=0
          Thickness  SWCON  KLAT
          150        0.5    0
          150        0.52   0
          200        0.55   0
          150        0.6    0
          250        0.65   0
          300        0.65   0
          300        0.65   0
        SoilNitrogen: same as Forage Crop Grazing.Field.Soil.SoilNitrogen
        Organic: FOMCNRatio=40
          Thickness  Carbon  SoilCNRatio  FBiom  FInert  FOM
          150        3       12           0.04   0.5     331.337
          150        1       12           0.02   0.7     245.461
          200        0.6     12           0.02   0.83    164.537
          150        0.4     12           0.01   0.9     121.892
          250        0.25    12           0.01   0.95    73.9313
          300        0.15    12           0      0.99    40.5743
          300        0.1     12           0      0.99    22.2677
        InitialWater Initial water: PercentMethod=1; FractionFull=0.95
        Sample Initial nitrogen: Thickness=[150, 150, 200, 150, 250, 300, 300]; SWUnits=Volumetric; OCUnits=Total; PHUnits=Water
        CERESSoilTemperature
      Report: EventNames=[Clock].EndOfDay
        VariableNames:
          [Clock].Today
          [AGPRyegrass].AboveGroundWt + [AGPWhiteClover].AboveGroundWt as PaddockBiomass
          [AGPRyegrass].HerbageGrowthWt + [AGPWhiteClover].HerbageGrowthWt as PastureGrowthReate
          ([AGPRyegrass].HerbageGrowthWt + [AGPWhiteClover].HerbageGrowthWt) * [Zone].Area as PaddockFeedAccum  // why did I have this?
    Zone Paddock02: Area=10; Slope=0; AspectAngle=0; Altitude=50
      Manager AutomaticIrrigation: same as A Simple Rotational Grazing.Paddock01.AutomaticIrrigation
      Manager AutomaticFertiliser: same as A Simple Rotational Grazing.Paddock01.AutomaticFertiliser
      Manager Fertilise on fixed dates: same as A Simple Rotational Grazing.Paddock01.Fertilise on fixed dates
      Irrigation
      Fertiliser
      SurfaceOrganicMatter: InitialResidueName=Sward; InitialResidueType=grass; InitialResidueMass=1000; InitialStandingFraction=0; InitialCPR=0; InitialCNR=15; FractionFaecesAdded=0.5
      PastureSpecies AGPRyegrass: same as A Simple Rotational Grazing.Paddock01.AGPRyegrass
      PastureSpecies AGPWhiteClover: same as A Simple Rotational Grazing.Paddock01.AGPWhiteClover
      Soil LismoreSoil: same as A Simple Rotational Grazing.Paddock01.LismoreSoil
      Report: same as A Simple Rotational Grazing.Paddock01.Report
    Zone Paddock03: same as A Simple Rotational Grazing.Paddock02
    Zone Paddock04: same as A Simple Rotational Grazing.Paddock02
    Zone Paddock05: same as A Simple Rotational Grazing.Paddock02
  Simulation WheatSheep
    Memo
      Di Mayberry (10/5/18)

      Sheep grazing wheat and fed in feedlot
      -

      In this simulation sheep are bought and sold on a specified date. There is also working code that allows sheep to be sold based on age and purchased to maintain flock size. This was causing some errors with supplement feeding, so was turned off.

      There are two paddocks. A feedlot that contains sheep fed supplement, and a continous wheat crop. Sheep are moved from the feedlot onto the wheat crop based on crop biomass and zadok stage.

      Manage_stock
      -
      1. Buy animals at start of year & put in feedlot
      2. Move animals from feedlot to crop when ready to graze
      3. Move animals from crop to feedlot
      4. Shear all animals on specified date
      5. Sell all animals at end of year

      Manage_supplement
      -
      1. Feeds stock supplement at set amount in feedlot only
      2. Restocks supplement store when reaches minimum level

      Errors to fix
      -
      1. When an animal dies, extra supplement is fed (see spikes in supp intake graph)
      2. When sheep are culled for age + purchased to maintain stocking rate, several groups of sheep are created.
      This causes irregular amounts of supplement to be fed.
    Report: EventNames=[Clock].EndOfDay
      VariableNames:
        [Clock].Today
        [Stock].Paddock as StockLocation
        [Stock].NumberAll as StockCount
        [Stock].NumberAll / [Paddock].Area as StockingRate  //(sheep/ha)
        [Stock].WeightAll as Weight // (kg)
        [Stock].IntakeAll.Weight as Intake
        [Stock].CondScoreAll as ConditionScore
        [Stock].WtChangeAll as MeanWeightChange
        [Stock].MilkWtAll * 0.04 * 0.08 + [Stock].MilkWtAll * 0.04 as MilkSolids
        [Stock].PastIntakeAll.Weight as PastureIntake
        [Stock].SuppIntakeAll.Weight as SupplimentIntake
        [Stock].FleeceWt as FleeceWeight
        [Stock].MEIntakeAll as MEIntake
        [ManageStock].Script.EventName as Event
        [ManageStock].Script.NumberSold as NumberSold
        [Paddock].Wheat.AboveGround.Wt*10 as PlantBiomass   // kg/ha
        [Paddock].Wheat.Grain.Wt*10 as PlantYield           // kg/ha
        [PaddockNotGrazed].Wheat.AboveGround.Wt*10 as PlantBiomassNG   // kg/ha
        [PaddockNotGrazed].Wheat.Grain.Wt*10 as PlantYieldNG           // kg/ha\
        [Paddock].Wheat.Phenology.Zadok.Stage
        [ManageSupplement].Script.SuppType
    Clock: Start=2000-01-01; End=2001-12-31
    Summary SummaryFile
    Weather: FileName=%root%\Examples\WeatherFiles\lincoln.met
    SoilArbitrator
    Stock: RandSeed=9999
      GenoTypes:
        {DeathRate=[0.02, 0.02], Conceptions=[0, 0.54, 0.41, 0], GenotypeName=SmallMerino, DamBreed=Small Merino, Generation=0, SRW=40, PotFleeceWt=3.6, MaxFibreDiam=19, FleeceYield=0.7, PeakMilk=0}
      PaddockList:
        {Area=1, Slope=0}
    Supplement: SpoilageTime=0
      Stores:
        Name            Stored  IsRoughage  DMContent  DMD  MEContent  CPConc  ProtDg  PConc   SConc   EEConc  ADIP2CP  AshAlk  MaxPassage
        fodder          0       true        0.85       0    0          0       0       0       0       0       0        0       0
        wheat, crushed  500000  false       1          0.9  13.8       0.14    0.92    0.0038  0.0014  0.02    0.02     0.18    0
    Manager ManageStock
      Buying = True
      AnimalType = SmallMerino
      Sex = Wethers
      BuyDate = 15-Jan
      BuyAge = 18
      BuyWeight = 30
      BuyLactating = 0
      NumAntoBuy = 50
      Selling = True
      SellPolicy = Date
      SaleAge = 0
      SaleWeight = 0
      SaleDate = 15-Dec
      SalePercentAnimals = 100
      PaddockToMoveAnimalsTo = [Paddock]
      MoveAnimalStartDate = 1-jan
      MoveAnimalEndDate = 31-dec
      MoveAnimalStartZadok = 0
      MoveAnimalEndZadok = 0
      BiomassThresholdToMoveAnimalsIn = 300
      BiomassThresholdToMoveAnimalsOut = 150
      ShearDate = 10-may
      Dummy =
      NumberSold = 0
      EventName =
```csharp
/*-------------------------------------------------------------------------------------
Sheep grazing wheat when conditions are suitable, and in feedlot the rest of the time.
---------------------------------------------------------------------------------------

In this example simulation sheep are bought and sold on specified date.
They are fed supplement in a feedlot at a set rate, but graze a wheat crop when crop biomass >= 2.4 t/ha.
Sheep are moved from the wheat crop and back to feedlot when crop biomass reaches 0.5 t/ha or crop zadok = 31.

Based on Sprague SJ, Kirkegaard JA, Dove H, Graham JM, McDonald SE, Kelman WM (2015) Integrating dual-purpose wheat and canola into high-rainfall livestock systems in south-eastern Australia. 1. Crop forage and grain yield. Crop and Pasture Science 66(4), 365-376. 

Activities in this manager:
1. Buy animals at start of year & put in feedlot
2. Move animals from feedlot to crop when ready to graze
3. Move animals from crop to feedlot 
4. Shear all animals on specified date
5. Sell all animals at end of year

ERRORS TO FIX
1. When an animal dies, extra supplement is fed (see spikes in supp intake graph)
2. When sheep are culled for age + purchased to maintain stocking rate, several groups of sheep are created.
This causes irregular amounts of supplement to be fed.
--------------------------------------------------------------------------------------*/


using System;
using Models.Core;
using Models.PMF;
using Models.Soils;
using Models.Utilities;
using Models.GrazPlan;
using APSIM.Shared.Utilities;
using System.Diagnostics;

namespace Models
{
    [Serializable]
    public class Script : Model
    {
        [Link] Clock clock;
        [Link] Stock Animals;
        [Link] Supplement Feed;
        [Link] Summary Summary;
        [Link] IPlant plant;
        [Link] Soil Soil; 
        [Link] Zone Paddock;

        private bool isGrazingCrop = false;
        private int tag = 1;

        public enum AnType
		{		
            Friesian,
            Jersey,
            SmallMerino
        }

        public enum Gender
        {
            Bulls,
            Cows,
            Steers,
            Heifers,
            Calves,
            Ewes,
            Rams,
            Wethers
        }

        public enum SellPolicyType
        {
            Date,
            Weight,
            Age
        }

		[Separator("Buying of animals")]

		[Description("Buy animals?")] 
		public bool Buying { get; set; }

		[Description("Breed of animal (must be chosen in Stock): ")] 
		[Display(EnabledCallback="BuyingEnabled")]
		public AnType AnimalType { get; set; }

		[Description("Type of animal bought: ")] 
		[Display(EnabledCallback="BuyingEnabled")]
		public Gender Sex { get; set; }

		[Description("Date to buy animals (dd-mmm)")] 
		[Display(EnabledCallback="BuyingEnabled")]
		public string BuyDate { get; set; }

		[Description("Age of bought animals (months): ")] 
		[Display(EnabledCallback="BuyingEnabled")]
		public double BuyAge { get; set; }

		[Description("Weight of bought animals (kg): ")] 
		[Display(EnabledCallback="BuyingEnabled")]
		public double BuyWeight { get; set; }

		[Description("Zero denotes not lactating; 1 or more denotes the time (days) since parturition:")] 
		[Display(EnabledCallback="BuyingEnabled")]
		public int BuyLactating { get; set; }

		[Description("Number of animals to buy: ")] 
		[Display(EnabledCallback="BuyingEnabled")]
		public int NumAntoBuy { get; set; }

		[Separator("Selling of animals")]

		[Description("Sell animals using this manager (tick) or use operations file (no tick); ensure operations are dis/enabled as required ")] 
		[Display(EnabledCallback="SellingEnabled")]
		public bool Selling { get; set; }

		[Description("Sell animals based on Age, Weight or Day of Year ")] 
		[Display(EnabledCallback="SellingEnabled")]
		public SellPolicyType SellPolicy { get; set; }

		[Description("Age at which to sell (months): ")] 
		[Display(EnabledCallback="SellingEnabled")]
		public double SaleAge { get; set; }

		[Description("Weight at which to sell (kg): ")] 
		[Display(EnabledCallback="SellingEnabled")]
		public double SaleWeight { get; set; }

		[Description("Date to sell animals (dd-mmm)")] 
		[Display(EnabledCallback="SellingEnabled")]
		public string SaleDate { get; set; }

		[Description("Percentage of animals to sell (%)")] 
		[Display(EnabledCallback="SellingEnabled")]
		public double SalePercentAnimals { get; set; }

		[Separator("Rule for moving animals into and out of paddock")]

		[Description("Name of paddock to move animals in to:")] 
		[Display(Type=DisplayType.Model, ModelType=typeof(Zone))]
		public IModel PaddockToMoveAnimalsTo { get; set; }

		[Description("First date to consider moving animals:")] 
		public string MoveAnimalStartDate { get; set; }

		[Description("Last date to consider moving animals:")] 
		public string MoveAnimalEndDate { get; set; }

		[Description("First zadok stage to consider moving animals INTO paddock (use 0 to ignore):")] 
		public double MoveAnimalStartZadok { get; set; }

		[Description("First zadok stage to consider moving animals OUT of paddock (use 0 to ignore):")] 
		public double MoveAnimalEndZadok { get; set; }

		[Description("Biomass threshold above which animals will move INTO paddock:")] 
		public double BiomassThresholdToMoveAnimalsIn { get; set; }

		[Description("Biomass threshold below which animals will move OUT of paddock:")] 
		public double BiomassThresholdToMoveAnimalsOut { get; set; }



		[Separator("Shearing")]

		[Description("Date to shear animals (dd-mmm)")] 
		public string ShearDate { get; set; }

		[Description(" ")] 
		public string Dummy { get; set; }

		////////////////////////////////////////////////////////////////////////////
		// Callback properties to control disabling of properties.
		////////////////////////////////////////////////////////////////////////////
		public bool BuyingEnabled { get { return Buying; } }

		public bool SellingEnabled { get { return Selling; } }


		////////////////////////////////////////////////////////////////////////////
		// Outputs
		////////////////////////////////////////////////////////////////////////////
		// <summary>Number of animals sold.</summary>
		public int NumberSold { get; set; }

		// <summary>Description of something that has happened.</summary>
		public string EventName { get; set; }

		////////////////////////////////////////////////////////////////////////////
		// Once only setup at start of simulation
		////////////////////////////////////////////////////////////////////////////
        [EventSubscribe("StartOfSimulation")]
        private void OnStartOfSimulation(object sender, EventArgs e)
 		{

 		}

		//////////////////////////////////////////////////////
		// Management that happens every day.
		//////////////////////////////////////////////////////
        [EventSubscribe("DoManagement")]
        private void OnDoManagement(object sender, EventArgs e)
        {
        	EventName = string.Empty;

        	// Buy animals
            if (Buying && DateUtilities.DatesAreEqual(BuyDate, clock.Today))
            {
                var purchase = new StockBuy();
                purchase.Genotype = AnimalType.ToString();   // "small merino"
                purchase.Number = NumAntoBuy;
                purchase.Sex = Sex.ToString();               // "wethers"
                purchase.Age = BuyAge;
                purchase.Weight = BuyWeight;
                purchase.UseTag = tag;
                purchase.Lactating = BuyLactating;
                Animals.Buy(purchase);
                var groupNumberOfBoughtAnimals = Animals.NoGroups;
                Animals.Move(groupNumberOfBoughtAnimals, "Feedlot");
                EventName = NumAntoBuy + " animals bought";
            }

            // Sell animals
            if (Selling)
            {
            	bool doSell = false;
		        if (SellPolicy == SellPolicyType.Date && DateUtilities.DatesAreEqual(SaleDate, clock.Today))
		        	doSell = true;
		        else if (SellPolicy == SellPolicyType.Weight && Animals.WeightAll >= SaleWeight)
	                doSell = true;
	            else if (SellPolicy == SellPolicyType.Age && Animals.AgeMonthsAll >= SaleAge)
                    doSell = true;

                if (doSell)
                {
                    NumberSold = Convert.ToInt32(Animals.NumberAll * SalePercentAnimals / 100.0);
		        	Animals.SellTag(tag, NumberSold);
	              	EventName = NumberSold + " animals sold";
	        	}
            }

        	// Move animals IN to grazing paddock.
            if (!isGrazingCrop && IsMoveAnimalsInConditionMet())
           	{
                for (int g = 1; g <= Animals.NoGroups; g++)
	                Animals.Move(g, PaddockToMoveAnimalsTo.Name);
	            isGrazingCrop = true;
	            EventName = "Animals moved to paddock";
            }

        	// Move animals OUT of grazing paddock.
            else if (isGrazingCrop && IsMoveAnimalsOutConditionMet())
           	{
                for (int g = 1; g <= Animals.NoGroups; g++)
	                Animals.Move(g, "Feedlot");
	            isGrazingCrop = false;
	            EventName = "Animals moved to feedlot";
            }

         	// Shear all animals on specified date
            if (DateUtilities.DatesEqual(ShearDate, clock.Today))
            {
                Animals.Shear(0, "");
	            EventName = "Animals shorn";
            }
        }

        private bool InGrazingWindow()
        {
        	if (MoveAnimalStartDate == null || MoveAnimalEndDate == null ||
            	DateUtilities.WithinDates(MoveAnimalStartDate, clock.Today, MoveAnimalEndDate))
	        	{
	        		double zadok = (double) Apsim.Get(plant as IModel, "Phenology.Zadok.Stage");
	        		if (MoveAnimalStartZadok == 0 || MoveAnimalEndZadok == 0 ||
	            		(zadok >= MoveAnimalStartZadok && zadok <= MoveAnimalEndZadok))
        				return true;
		       	}
		    return false;
        }

        ////////////////////////////////////////////////////////////////////////
		// Condition that determines when animals move IN to paddock for grazing.
		// Return true if animals should be moved.
		////////////////////////////////////////////////////////////////////////
        private bool IsMoveAnimalsInConditionMet()
        {
        	if (clock.Today.DayOfWeek != DayOfWeek.Monday)
    		{
	        	if (InGrazingWindow() && plant.AboveGround.Wt > BiomassThresholdToMoveAnimalsIn)
    				return true;
		    }
        	return false;
    	}

        ////////////////////////////////////////////////////////////////////////
		// Condition that determines when animals move OUT of paddock for grazing.
		// Return true if animals should be moved.
		////////////////////////////////////////////////////////////////////////
        private bool IsMoveAnimalsOutConditionMet()
        {
        	if (!InGrazingWindow() || plant.AboveGround.Wt < BiomassThresholdToMoveAnimalsOut)
        		return true;
	        return false;
        }
    }
}
```
    Manager ManageSupplement
      SupplementAmount = 50
      SuppType = wheat, crushed
      SupplementThreshold = 500
```csharp
/*--------------------------------------------------------------------------------------------------
Sheep grazing wheat when conditions are suitable, and in feedlot fed supplement the rest of the time.
----------------------------------------------------------------------------------------------------

This manager:
1. Feeds stock supplement at set amount in feedlot only
2. Restocks supplement store when reaches minimum level

--------------------------------------------------------------------------------------------------*/


using System;
using Models.Core;
using Models.PMF;
using Models.Soils;
using Models.Utilities;
using Models.GrazPlan;
using APSIM.Shared.Utilities;

namespace Models
{
	[Serializable]
	public class Script : Model
	{
		[Link] Clock clock;
		[Link] Stock Animals;
		[Link] Supplement Feed;
		[Link] Summary Summary;
		[Link] Plant Wheat;
		[Link] Soil Soil;
		[Link] Zone Paddock;


		private int group_count;
		private int g;

		private string buy_date;
		private string buy_name;
		private double buy_amount;

		[Description("Amount supplement to feed (kg/animal). Supplement fed is as-is (fresh weight) basis.")]
		public double SupplementAmount { get; set; }

		[Description("Supplement type")]
		public string SuppType { get; set; }

		[Description("Minimum amount of supplement in store (kg)")]
		public double SupplementThreshold { get; set; }

		//////////////////////////////////////////////////////
		// Management that happens every day.
		//////////////////////////////////////////////////////

		[EventSubscribe("DoManagement")]
		private void OnDoManagement(object sender, EventArgs e)
		{
			// Feed animals supplement in feedot only
			for (int g = 0; g < Animals.NoGroups; g++)
			{
				// Check if animals are currently in feedlot. If so then offer supplement
				if (string.Compare(Animals.Paddock[g], "Feedlot", true) == 0)   {                                                                
					Feed.Feed(SuppType, SupplementAmount * Animals.NumberAll, "Feedlot");     
				}
			}

			// Stock supplement store
			if (Feed.Stores[1].Stored <= SupplementThreshold)
			{
				Feed.Buy(5000, SuppType);           // Amount (kg) and type of supplement to buy
				Summary.WriteMessage(this, string.Format("Buy supplement: {0:0.00} kg of {1}", 5000, "wheat, crushed"));
			}
		}
	}
}
```
    Zone Paddock: Area=1; Slope=0; AspectAngle=0; Altitude=50
      Fertiliser
      Soil: ASCOrder=Podzolic; SoilType=?; Site=Canberra; NearestTown=Canberra; Region=Gungahlin District; State=Australian Capital Territory; Country=Australia; ApsoilNumber=580-YP; Latitude=-35.201; Longitude=149.082
        DataSource=YP. Ginnenderra Experiment Station (GES). Data provided by James Hunt, based on measurements by John Kirkegaard, characterisation done by Julianne Lilley. Ginnenderra Experiment Station
        Physical
          Thickness  BD    AirDry  LL15   DUL   SAT
          100        1.42  0.04    0.059  0.21  0.408
          100        1.42  0.04    0.064  0.21  0.408
          200        1.48  0.05    0.085  0.21  0.427
          100        1.48  0.06    0.114  0.21  0.427
          200        1.48  0.08    0.13   0.21  0.427
          100        1.48  0.08    0.137  0.21  0.427
          200        1.48  0.09    0.141  0.21  0.427
          300        1.48  0.11    0.15   0.21  0.427
          300        1.48  0.11    0.161  0.21  0.427
          200        1.48  0.11    0.174  0.21  0.427
          200        1.48  0.11    0.174  0.21  0.427
          SoilCrop WheatSoil
            LL=[0.059, 0.064, 0.085, 0.114, 0.13, 0.137, 0.141, 0.15, 0.161, 0.174, 0.174]
            KL=[0.08, 0.08, 0.06, 0.05, 0.04, 0.03, 0.03, 0.02, 0.02, 0.01, 0.01]
            XF=[1, 1, 1, 1, 1, 1, 1, 1, 0.7, 0.4, 0]
        SoilWater: SummerDate=1-Nov; SummerU=6; SummerCona=2; WinterDate=1-Apr; WinterU=2; WinterCona=2; DiffusConst=88; DiffusSlope=35.4; Salb=0.13; CN2Bare=72; CNRed=20; CNCov=0.8; max_pond=0; Thickness=[100, 100, 200, 100, 200, 100, 200, 300, 300, 200, 200]; SWCON=[0.8, 0.8, 0.8, 0.8, 0.8, 0.8, 0.8, 0.8, 0.6, 0.6, 0.6]; PrecipitationInterception=0
        SoilNitrogen: same as Forage Crop Grazing.Field.Soil.SoilNitrogen
        Organic: FOMCNRatio=80
          Thickness  Carbon  SoilCNRatio  FBiom  FInert  FOM
          100        2.2     10           0.06   0       671.213
          100        0.5     10           0.05   0       577.718
          200        0.3     10           0.03   0.3     427.984
          100        0.2     10           0.02   0.4     368.37
          200        0.2     10           0.02   0.5     272.895
          100        0.15    10           0.01   0.6     234.883
          200        0.15    10           0.01   0.8     174.005
          300        0.1     10           0.01   0.9     110.951
          300        0.08    10           0.01   1       70.7453
          200        0.06    10           0.01   1       52.4094
          200        0.04    10           0.01   1       38.8259
        Chemical
          Thickness  NO3N      NH4N       PH
          100        0.377074  0.0377074  5.1
          100        0.377074  0.0377074  5.1
          200        0.377074  0.0377074  5.3
          100        0.377074  0.0377074  5.3
          200        0.377074  0.0377074  5.9
          100        0.377074  0.0377074  5.9
          200        0.377074  0.0377074  6.4
          300        0.377074  0.0377074  6.4
          300        0.377074  0.0377074  6.8
          200        0.377074  0.0377074  6.8
          200        1         0.2        6.8
        InitialWater: PercentMethod=0; FractionFull=1
        Sample InitialN: Depth=[0-180]; Thickness=[1800]; SWUnits=Volumetric; OCUnits=Total; PHUnits=Water
        CERESSoilTemperature
      SurfaceOrganicMatter: InitialResidueName=wheat_stubble; InitialResidueType=wheat; InitialResidueMass=500; InitialStandingFraction=0; InitialCPR=0; InitialCNR=100; FractionFaecesAdded=0.5
      Plant Wheat: CropType=Wheat; IsEnding=false; DaysAfterEnding=0
      MicroClimate: a_interception=0; b_interception=1; c_interception=0; d_interception=0; soil_albedo=0.3; SoilHeatFluxFraction=0.4; NightInterceptionFraction=0.5; ReferenceHeight=2
      Manager SowingRule
        StartDate = 1-mar
        EndDate = 30-mar
        MinESW = 0
        MinRain = 0
        RainDays = 0
        CultivarName = MacKellar
        SowingDepth = 30
        RowSpacing = 180
        Population = 200
```csharp
using System;
using Models.Core;
using Models.PMF;
using Models.Soils;
using Models.Utilities;
using APSIM.Shared.Utilities;

namespace Models
{
    [Serializable]
    public class Script : Model
    {
        [Link] Clock Clock;
        [Link] Fertiliser Fertiliser;
        [Link] Summary Summary;
        [Link] Plant Wheat;
        [Link] Soil Soil; 
        Accumulator accumulatedRain;
        
        [Description("Start of sowing window (d-mmm)")]
        public string StartDate { get; set;}
        [Description("End of sowing window (d-mmm)")]
        public string EndDate { get; set;}
        [Description("Minimum extractable soil water for sowing (mm)")]
        public double MinESW { get; set;}
        [Description("Accumulated rainfall required for sowing (mm)")]
        public double MinRain { get; set;}
        [Description("Duration of rainfall accumulation (d)")]
        public int RainDays { get; set;}
        [Description("Cultivar to be sown")]
        [Display(Type=DisplayType.CultivarName)]
        public string CultivarName { get; set;}
        [Description("Sowing depth (mm)")]
        public double SowingDepth { get; set;}        
        [Description("Row spacing (mm)")]
        public double RowSpacing { get; set;}    
        [Description("Plant population (/m2)")]
        public double Population { get; set;}    
        
        
        [EventSubscribe("Commencing")]
        private void OnSimulationCommencing(object sender, EventArgs e)
        {
            accumulatedRain = new Accumulator(this, "[Weather].Rain", RainDays);
        }
        

        [EventSubscribe("DoManagement")]
        private void OnDoManagement(object sender, EventArgs e)
        {
            accumulatedRain.Update();
            
            if (DateUtilities.WithinDates(StartDate,Clock.Today,EndDate) &&
                !Wheat.IsAlive &&
                MathUtilities.Sum(Soil.SoilWater.ESW) > MinESW &&
                accumulatedRain.Sum > MinRain)
            {
               Wheat.Sow(population:Population, cultivar:CultivarName, depth:SowingDepth, rowSpacing:RowSpacing);    
            }
        
        }
        
    }
}
```
      Manager SowingFertiliser
        Amount = 130
        CropName = wheat
```csharp
using System;
using Models.Core;
using Models.PMF;
namespace Models
{
    [Serializable]
    public class Script : Model
    {
        [Link] Clock Clock;
        [Link] Fertiliser Fertiliser;
        [Link] Summary Summary;
        
        
        [Description("Amount of fertiliser to be applied (kg/ha)")]
        public double Amount { get; set;}
        
        [Description("Crop to be fertilised")]
        public string CropName { get; set;}
        
        
        

        [EventSubscribe("Sowing")]
        private void OnSowing(object sender, EventArgs e)
        {
            Model crop = sender as Model;
            if (crop.Name.ToLower()==CropName.ToLower())
                Fertiliser.Apply(Amount: Amount, Type: Fertiliser.Types.NO3N);
        }
        
    }
}
```
      Manager Harvest
```csharp
using System;
using Models.Core;
using Models.PMF;
using Models.Soils;
using Models.Utilities;
using APSIM.Shared.Utilities;

namespace Models
{
    [Serializable]
    public class Script : Model
    {
        [Link] Plant Wheat;

        [EventSubscribe("DoManagement")]
        private void OnDoManagement(object sender, EventArgs e)
        {
            if (Wheat.IsReadyForHarvesting)
            {
               Wheat.Harvest();
               Wheat.EndCrop();    
            }
        
        }
        
    }
}
```
    Zone Feedlot: Area=10; Slope=0; AspectAngle=0; Altitude=50
      Soil: ASCOrder=Vertosol; ASCSubOrder=Black; SoilType=Clay; Site=Norwin; NearestTown=Norwin; Region=Darling Downs and Granite Belt; State=Queensland; Country=Australia; NaturalVegetation=Qld. Bluegrass, possible Qld. Blue gum; ApsoilNumber=900; Latitude=-27.581836; Longitude=151.320206; LocationAccuracy=+/- 20m
        DataSource=CSIRO Sustainable Ecosystems, Toowoomba; Characteriesd as part of the GRDC funded project"Doing it better, doing it smarter, managing soil water in Australian agriculture' 2011
        Comments=OC, CLL for all crops estimated-based on Bongeen Mywybilla Soil No1
        Physical
          Thickness  BD       AirDry    LL15      DUL       SAT       KS
          150        1.01056  0.13025   0.2605    0.521     0.588655  20
          150        1.07146  0.198689  0.248362  0.496723  0.565677  20
          300        1.09394  0.28      0.28      0.488438  0.557193  20
          300        1.15861  0.28      0.28      0.480297  0.532787  20
          300        1.17301  0.28      0.28      0.471584  0.527354  20
          300        1.16287  0.28      0.28      0.457071  0.53118   20
          300        1.1875   0.28      0.28      0.452332  0.521888  20
          SoilCrop WheatSoil: LL=[0.261, 0.248, 0.28, 0.306, 0.36, 0.392, 0.446]; KL=[0.06, 0.06, 0.06, 0.04, 0.04, 0.02, 0.01]; XF=[1, 1, 1, 1, 1, 1, 1]
        SoilWater: SummerDate=1-Nov; SummerU=5; SummerCona=5; WinterDate=1-Apr; WinterU=5; WinterCona=5; DiffusConst=40; DiffusSlope=16; Salb=0.12; CN2Bare=73; CNRed=20; CNCov=0.8; max_pond=0; Thickness=[150, 150, 300, 300, 300, 300, 300]; SWCON=[0.3, 0.3, 0.3, 0.3, 0.3, 0.3, 0.3]; PrecipitationInterception=0
        SoilNitrogen: same as Forage Crop Grazing.Field.Soil.SoilNitrogen
        Organic: FOMCNRatio=40
          Thickness  Carbon  SoilCNRatio  FBiom  FInert  FOM
          150        1.2     12           0.04   0.4     347.129
          150        0.96    12           0.02   0.6     270.344
          300        0.6     12           0.02   0.8     163.972
          300        0.3     12           0.02   1       99.4541
          300        0.18    12           0.01   1       60.322
          300        0.12    12           0.01   1       36.5871
          300        0.12    12           0.01   1       22.1912
        Chemical
          Thickness  NO3N  NH4N  PH
          150        1     0.1   8
          150        1     0.1   8
          300        1     0.1   8
          300        1     0.1   8
          300        1     0.1   8
          300        1     0.1   8
          300        1     0.1   8
        InitialWater: PercentMethod=1; FractionFull=1
        Sample InitialN: Thickness=[150, 150, 300, 300, 300, 300, 300]; SWUnits=Volumetric; OCUnits=Total; PHUnits=Water
        CERESSoilTemperature
      SurfaceOrganicMatter: InitialResidueName=wheat_stubble; InitialResidueType=wheat; InitialResidueMass=0; InitialStandingFraction=0; InitialCPR=0; InitialCNR=100; FractionFaecesAdded=0.5
      MicroClimate: a_interception=0; b_interception=1; c_interception=0; d_interception=0; soil_albedo=0.3; SoilHeatFluxFraction=0.4; NightInterceptionFraction=0.5; ReferenceHeight=2
    Zone PaddockNotGrazed: same as WheatSheep.Paddock
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