Simulations: Version=1
  Replacements
    Plant Tef: CropType=Tef
      Memo TitlePage
        # The APSIM Tef Model

        The APSIM Tef model has been developed using the Plant Modelling Framework (PMF) of Brown _et al_(2014).This new framework provides a library of plant organ and process submodels that can be coupled, at runtime, to construct a model in much the same way that models can be coupled to construct a simulation. This means that dynamic composition of lower level process and organ classes (e.g. photosynthesis, leaf) into larger constructions (e.g. Tef, wheat, sorghum) can be achieved by the model developer without additional coding.
      OrganArbitrator Arbitrator: NArbitrationOption=PrioritythenRelativeAllocation; DMArbitrationOption=RelativeAllocation
        Memo
          There are a number of passes involved in the allocation of Weight (Wt).
          Wt_Step 1\. Set up DM supplies and demands. Each organ may have a demand for Structural, Metabolic and Non-structural Wt. Each organ may supply Fresh DM from photosynthesis and/or stored DM from retranslocation of its Non-structural pool.
           Wt_Step 2\. In this step freshly fixed Wt is partitioned to organs based on their relative Structural and Metabolic demands such that if there is not enough freshly fixed Wt to meet these demands the organs with the highest demands get the greatest share of the photosynthesis.
           Wt_Step 3\. In the second step any freshly fixed DM that was surplus to Structural and Metabolic demands is partitioned to sink organs. An organ will be a sink if it is parameterised to have a Non-structural (mobile) component and the capacity of each organ to receive excess DM depends on its structural fraction (which determines the Non-structural Fraction and subsequent sink capacity). If there is still fresh DM unallocated after the second pass this remains unallocated with the assumption that in this case the plant would down regulate photosynthesis due to lack of sink capacity.
           Wt_Step 4\. In this step, Non-structural DM is reallocated from Non-Structural pools if there was insufficient DM to meet the structural and metabolic DM demands of organs.
           The arbitrator then sends a potential DM allocation to each organ that they use to calculate their N demands and then steps through N partitioning routines. The final pass in biomass partitioning comes after N partitioning

          N_Step 1\. Set up N supplies and demands. Each organ may (or may not) supply N in a number of ways. Each organ has (potentially) a structural, metabolic and Non-structural N Demand. The structural N demand is that required to grow immobile biomass components, Metabolic N is that required to produce working biomass such as the photosynthetic mechanism in the leaves. The Non-structural N demand is considered to be the luxury uptake and storage of highly mobile N compounds such as nitrate.
           Each of the following 4 steps have a number of processes in common; Firstly the arbitrator determines each organs current N demand (that outstanding after previous N partitioning steps), then it allocates N to each demanding organ (There are three ways that N can be allocated, see below), then it sets for each supplying organ the amount of N that was taken up.
           N_Step 2\. NReallocation. This is the supply of N within the plant by the reallocation of sensing and/or Non-structural N which is the lowest energy form of N available to the plant so is partitioned first.
           N_Step 3\. NUptake. This is the supply of mineral N from the environment (typically by roots from the soil). In this step the arbitrator partitions the potential N uptake supply to satisfy all organs N demands (Structural, Metabolic and Non-structural). If supply is sufficient this will replenish all Non-structural N that was reallocated in the previous step. If not the N conc of organs with a Non-structural N component will begin to fall. If total N demand is less than the uptake supply the crop will leave the surplus mineral N in the soil.
           N_Step 4\. NFixation. This is the supply of symbiotically fixed N and is redundant for Non-fixers! The arbitrator will asks all N fixing organs (typically nodules) for their potential N fixation supply and then partition this to meet the Structural and Metabolic N demands of organs. The arbitrator will not fix N to meet Non-structural N demands to minimise the biomass cost of fixation which is metabolically expensive. Fixation follows uptake to enable the arbitrator to capture the "Lazy" N fixing behaviour of some legumes. Once fixation is calculated the arbitrator determines the DM cost of this fixation.
           N_Step 5\. NRetranslocation. This is only invoked under sever N shortage when NReallocation and Uptake (and fixation if appropriate) cannot meet structural and metabolic N demands. It this step the arbitrator will remove Metabolic N from older leaf cohorts to meet the N demand of new leaves and reproductive organs.

          In all of these N partitioning steps there are three options the developer may chose for determining the allocation of N between demanding organs.
           1\. RelativeAllocation. If this option is used all N is partitioned to organs relative to their demand so that the organs with the larger N demand get a larger share of a limited N supply.
           2\. PriorityAllocation. If this option is used the arbitrator steps through all organs in order of priority (set by the order they appear in the IDE) allocating N to meet all of the first organs structural and metabolic N demands before partitioning any to the next organ in the hierarchy. Once it has stepped through all organs and allocated their minimum (structural and metabolic) N demands it will then step through them again and allocate their luxury (Non-structural) N demands in the same way.
           3\. PrioritythenRelativeAllocation. If this option is used the arbitrator steps through all organs in order of priority allocating N to meet minimum N demands. However on the second pass it allocated N relative to the organs outstanding demands such that the organ with the greatest luxury N demand will get the greatest share of the N allocation.

          Wt_Step 5\. Once N is allocated the arbitrator then reduces the Wt allocation of each organ to account for the metabolic cost of N fixation. The Wt reduction is spread around all organs and an organ will only have its Wt allocation limited until it reaches maximum N conc.
           Wt_Step 6\. Then the arbitrator determines if the N allocated to each organ is sufficient for that organ to reach its minimum N concentration. If not the arbitrator will constrain the biomass growth of that organ and discards the surplus biomass. This assume that under sever N stress photosynthesis would be down regulated due to N inadequacy limiting sink strength.

          Once these steps are complete the Arbitrator finally communicates to each organ its state changes as a result of arbitration.
      Phenology: Emerged=false
        Memo
          The phenology model used in the APSIM Tef model follows the approach used in earlier Tef models(Jones and Kiniry (1986), Carberry and Arbrecht (1991), Carberry et al (1989).  The model predicts development of primordia on the apex of the main stem and appearance of individual leaves to predict time to flag leaf.  Other stages use thermal time targets.  <br/>
        AirTemperatureFunction ThermalTime
          XYPairs: X=[10, 33, 47]; Y=[0, 23, 0]
        GerminatingPhase Germinating: Start=Sowing; End=Germination
        EmergingPhase Emerging: Start=Germination; End=Emergence; ShootLag=30; ShootRate=0
          VariableReference ThermalTime: VariableName=[Phenology].ThermalTime.Value
        GenericPhase Juvenile: Start=Emergence; End=End_Juvenile
          Memo
            Data from van Delden et al (2012) showed that panicle initiation occurred at leaf number 4 or 5 for 4 varieties grown under short day lengths.  This suggests that the duration of the juvenile phase should be approximately 4-5 phyllochrons, depending on the cultivar.  The default is assumed to be 4, but this can be changed as required for other cultivars.<br/>
          Constant Target: Value=100
          VariableReference ThermalTime: VariableName=[Phenology].ThermalTime.Value
        GenericPhase Photosensitive: Start=End_Juvenile; End=Floral_Initiation
          Memo
            Data from van Delden et al (2012) showed that final leaf number for a selection of tef cultivars increased with increasing photoperiod.  A photoperiod response has been fitted to these data.  Cultivar Gibe showed an increase in final leaf number from 4 to 7 leaves as photoperiod increased from 10.3h to 13.5h.  Cultivar Ziquala showed an increase in final leaf number from 4 to 9 leaves as photoperiod increased from 11.5 h to 13.5h.  The photoperiod response for Dutch cultivars extended to much longer day lengths.  Cultivar Ayana showed an increase in final leaf number from 4 to 5 leaves as photoperiod increased from 10 h to 15 h. Cultivar 04T19  showed an increase in final leaf number from 4 to 7 leaves as photoperiod increased from 9.5 h to 17 h.<br/>
          VariableReference ThermalTime: VariableName=[Phenology].ThermalTime.Value
          LinearInterpolationFunction Target: XProperty=[Phenology].Photoperiod.Value
            XYPairs: X=[0, 10.3, 13.5, 16]; Y=[0, 0, 150, 150]
        LeafAppearancePhase LeafAppearance: Start=Floral_Initiation; End=Flag_Leaf
          VariableReference ThermalTime: VariableName=[Phenology].ThermalTime.Value
        GenericPhase FlagLeafToFlowering: Start=Flag_Leaf; End=Flowering
          Memo
            van Delden et al (2012) explain that many tef varieties are self-polinating with flowering co-incident with heading.  We assume that heading occurs one phyllochron after flag leaf.<br/>
          Constant Target: Value=150
          VariableReference ThermalTime: VariableName=[Phenology].ThermalTime.Value
        GenericPhase FloweringToGrainFilling: Start=Flowering; End=StartGrainFill
          Memo
            Unknown?????????????????????????????????????<br/>
          Constant Target: Value=120
          VariableReference ThermalTime: VariableName=[Phenology].ThermalTime.Value
        GenericPhase GrainFilling: Start=StartGrainFill; End=EndGrainFill
          Memo
            Unknown?????????????????????????????????????<br/>
          Constant Target: Value=550
          VariableReference ThermalTime: VariableName=[Phenology].ThermalTime.Value
        GenericPhase Maturing: Start=EndGrainFill; End=Maturity
          Memo
            Unknown?????????????????????????????????????<br/>
          Constant Target: Value=10
          VariableReference ThermalTime: VariableName=[Phenology].ThermalTime.Value
        GenericPhase MaturityToHarvestRipe: Start=Maturity; End=HarvestRipe
          Memo
            Unknown?????????????????????????????????????<br/>
          Constant Target: Value=10
          VariableReference ThermalTime: VariableName=[Phenology].ThermalTime.Value
        EndPhase ReadyForHarvesting: Start=HarvestRipe; End=Unused
          VariableReference ThermalTime: VariableName=[Phenology].ThermalTime.Value
        PhotoperiodFunction Photoperiod: Twilight=-6
        OnEventFunction FloweringDAS: SetEvent=Flowering; ReSetEvent=never
          Memo
            A function is used to provide flowering date as days after sowing(DAS).
            <br/>
          Constant PreEventValue: Value=0
          VariableReference PostEventValue: VariableName=[Phenology].DaysAfterSowing
        OnEventFunction MaturityDAS: SetEvent=Maturity; ReSetEvent=never
          Memo
            A function is used to provide maturity date as days after sowing(DAS).
            <br/>
          Constant PreEventValue: Value=0
          VariableReference PostEventValue: VariableName=[Phenology].DaysAfterSowing
      Structure: InitialiseStage=Emergence; PrimaryBudNo=1
        VariableReference ThermalTime: VariableName=[Phenology].ThermalTime.Value
        PhaseLookup MainStemPrimordiaInitiationRate
          PhaseLookupValue Plastochron: Start=Emergence; End=Floral_Initiation
            Constant ConstantPlastochron: Value=50
        PhaseLookup MainStemNodeAppearanceRate
          PhaseLookupValue Phyllochron: Start=Emergence; End=Flag_Leaf
            LinearInterpolationFunction Phyllochron: XProperty=[Structure].MainStemNodeNo
              XYPairs: X=[1, 4, 5, 9]; Y=[25, 25, 50, 150]
        MainStemFinalNodeNumberFunction MainStemFinalNodeNumber: MaximumMainStemNodeNumber=30
          OnEventFunction FinalLeafNumber: SetEvent=Floral_Initiation
            AddFunction PreEventValue
              Constant PrimordiaAtEmergence: Value=5
              DivideFunction PrimordiaDuringJuvenilePhase
                VariableReference JuvenilePhaseDuration: VariableName=[Phenology].Juvenile.Target.Value
                VariableReference Plastochron
                  VariableName=[Structure].MainStemPrimordiaInitiationRate.Plastochron.Value
            VariableReference PostEventValue: VariableName=[Structure].MainStemPrimordiaNo
        HeightFunction HeightModel
          LinearInterpolationFunction PotentialHeight: XProperty=[Phenology].Stage
            XYPairs: X=[3, 4, 5, 6]; Y=[20, 50, 60, 1000]
          LinearInterpolationFunction WaterStress: XProperty=[Tef].WaterSupplyDemandRatio
            XYPairs: X=[0.3, 1]; Y=[1, 1]
        Constant BranchingRate: Value=0
        Constant ShadeInducedBranchMortality: Value=0
        Constant DroughtInducedBranchMortality: Value=0
      ReproductiveOrgan Grain: FractionRemoved=0; FractionToResidue=0
        Constant InitialGrainProportion: Value=0.05
        Constant MaximumPotentialGrainSize: Value=0.3
        PhaseLookup DMDemandFunction
          PhaseLookupValue InitialPhase: Start=Flowering; End=StartGrainFill
            FillingRateFunction
              VariableReference NumberFunction: VariableName=[Grain].NumberFunction.Value
              VariableReference FillingDuration: VariableName=[Phenology].FloweringToGrainFilling.Target.Value
              VariableReference ThermalTime: VariableName=[Phenology].ThermalTime.Value
              MultiplyFunction PotentialSizeIncrement
                VariableReference InitialProportion: VariableName=[Grain].InitialGrainProportion.Value
                VariableReference MaximumSize: VariableName=[Grain].MaximumPotentialGrainSize.Value
          PhaseLookupValue LinearPhase: Start=StartGrainFill; End=EndGrainFill
            FillingRateFunction
              VariableReference NumberFunction: VariableName=[Grain].NumberFunction.Value
              VariableReference FillingDuration: VariableName=[Phenology].GrainFilling.Target.Value
              VariableReference ThermalTime: VariableName=[Phenology].ThermalTime.Value
              MultiplyFunction PotentialSizeIncrement
                SubtractFunction ProportionLinearPhase
                  Constant One: Value=1
                  VariableReference InitialProportion: VariableName=[Grain].InitialGrainProportion.Value
                VariableReference MaximumSize: VariableName=[Grain].MaximumPotentialGrainSize.Value
        Biomass Live
        Biomass Dead
        Constant MinimumNConc: Value=0.008
        PhaseLookup MaximumNConc
          PhaseLookupValue InitialPhase: Start=Flowering; End=StartGrainFill
            Constant InitialNconc: Value=0.05
          PhaseLookupValue LinearPhase: Start=StartGrainFill; End=EndGrainFill
            Constant FinalNconc: Value=0.013
        Constant WaterContent: Value=0.12
        PhaseLookup NFillingRate
          PhaseLookupValue GrainFilling: Start=Flowering; End=EndGrainFill
            FillingRateFunction
              VariableReference NumberFunction: VariableName=[Grain].NumberFunction.Value
              AddFunction FillingDuration
                VariableReference FloweringToGrainFilling: VariableName=[Phenology].FloweringToGrainFilling.Target.Value
                VariableReference GrainFilling: VariableName=[Phenology].GrainFilling.Target.Value
              VariableReference ThermalTime: VariableName=[Phenology].ThermalTime.Value
              MultiplyFunction PotentialSizeIncrement
                Constant MaximumFinalNConc: Value=0.013
                VariableReference MaximumSize: VariableName=[Grain].MaximumPotentialGrainSize.Value
        MultiplyFunction NumberFunction
          VariableReference CobNumber: VariableName=[Rachis].CobNumber.Value
          LinearInterpolationFunction KernalsPerCob: XProperty=[Rachis].CobSize.Value
            XYPairs: X=[0, 25]; Y=[0, 550]
          Constant GrainPerKernal: Value=1
      Root: FractionRemoved=0; FractionToResidue=0; InitialDM=0.2; SpecificRootLength=40000; KNO3_yProperty=[0, 0.03]; KNO3_xRootLength=[0, 0.003]; KNH4_yProperty=[0, 0.0003]; KNH4_xRootLength=[0, 0.003]; NuptakeSupply=0
        CompositeBiomass Live: Propertys=[[Root].LayerLive]
        CompositeBiomass Dead: Propertys=[[Root].LayerDead]
        LinearInterpolationFunction KLModifier: XProperty=[Tef].Population
          Memo
            The parameter KL is is described by Meinke et al (1993) to combine elements of soil conductivity (K) with root length (L) in determining root water uptake.  Peake et al (2013) demonstrated that in Tef KL varied with plant population through impacts on root length density.  Here we adjust KL linearly with plant population.
            <br/>
          XYPairs: X=[0, 10]; Y=[1, 1]
        Constant SoilWaterEffect: Value=1
          Memo
            No effect of soil water content on root growth is currently captured in the model.<br/>
        Constant TemperatureEffect: Value=1
          Memo
            No effect of temperature on root growth is currently captured in the model.<br/>
        Constant MaxDailyNUptake: Value=20
          Memo
            Maximum daily N uptake is set to an arbitrarily high value.<br/>
        Constant SenescenceRate: Value=0.005
          Memo
            Jones and Kiniry (1986) used a constant root senescence fraction in the CERES-Tef model.<br/>
        Constant StructuralFraction: Value=1
        Constant MaximumNConc: Value=0.01
        Constant MinimumNConc: Value=0.01
        LinearInterpolationFunction PartitionFraction: XProperty=[Phenology].Stage
          XYPairs: X=[0, 2.99, 3, 6, 7]; Y=[0, 0, 0.2, 0.2, 0]
        PhaseLookup RootFrontVelocity
          Memo
            Hammer et al (2009) used a constant extraction front velocity of 2.5cm per day in their analysis of historical Tef yield trends in the US corn belt.
            <br/>
          PhaseLookupValue PreFlowering: Start=Germination; End=Flowering
            Constant Function: Value=25
          PhaseLookupValue PostFlowering: Start=Flowering; End=Maturity
            Constant Function: Value=0
        PhaseBasedSwitch NitrogenDemandSwitch: Start=Germination; End=Maturity
      Leaf: MaxCover=1; KDead=0.03; GsMax=0.03; R50=200; Emissivity=0.96; Albido=0.26
        zero: FractionRemoved, FractionToResidue, CurrentExpandingLeaf, StartFractionExpanded, FractionNextleafExpanded, _ExpandedNodeNo, DeadNodesYesterday, FRGR, PotentialEP, FractionDied
        LeafCohort InitialLeaves[1]: Rank=1; Area=380
        LeafCohort InitialLeaves[2]: Rank=2; Area=0
        LeafCohort InitialLeaves[3]: Rank=3; Area=0
        LeafCohort InitialLeaves[4]: Rank=4; Area=0
        LeafCohort InitialLeaves[5]: Rank=5; Area=0
        LeafCohort InitialLeaves[6]: Rank=6; Area=0
        CompositeBiomass Live: Propertys=[[Leaf].CohortLive]
        CompositeBiomass Dead: Propertys=[[Leaf].CohortDead]
        ArrayBiomass CohortArrayLive: Propertys=[[Leaf].Live]; ArraySize=[Leaf].MaxNodeNo
        ArrayBiomass CohortArrayDead: Propertys=[[Leaf].Dead]; ArraySize=[Leaf].MaxNodeNo
        LeafCohortParameters CohortParameters
          BellCurveFunction MaxArea
            Memo
              Potential leaf area is calculated from leaf number using the approach of Keating and Wafula (1992).Individual leaf size is described using a bell-shaped curve, the parameters of which are derived from final leaf number.<br/>
            MultiplyFunction LargestLeafPosition
              VariableReference FinalLeafNumber: VariableName=[Structure].MainStemFinalNodeNumber.Value
              Constant RelativePositionOfLargestLeaf: Value=0.67
            LinearInterpolationFunction AreaMax: XProperty=[Structure].MainStemFinalNodeNumber.Value
              XYPairs: X=[1, 5, 10, 15, 20, 25]; Y=[32530, 39259, 49659, 60000, 75000, 90000]
            LinearInterpolationFunction Breadth: XProperty=[Structure].MainStemFinalNodeNumber.Value
              XYPairs: X=[5, 10, 15, 20, 25]; Y=[-0.377, -0.144, -0.059, -0.027, -0.016]
            Constant Skewness: Value=0.00025
          Constant NReallocationFactor: Value=0.1
          Constant NRetranslocationFactor: Value=0.03
          Constant DMRetranslocationFactor: Value=0.5
          LinearInterpolationFunction CellDivisionStress: XProperty=[Tef].WaterSupplyDemandRatio
            XYPairs: X=[0.9, 1]; Y=[1, 1]
          LinearInterpolationFunction ExpansionStress: XProperty=[Tef].WaterSupplyDemandRatio
            XYPairs: X=[0.3, 1]; Y=[0.1, 1]
          LinearInterpolationFunction GrowthDuration: XProperty=[Structure].RelativeNodeApperance
            XYPairs: X=[0, 0.3, 0.5, 1]; Y=[0, 200, 250, 100]
          LinearInterpolationFunction LagDuration: XProperty=[Structure].RelativeNodeApperance
            XYPairs: X=[0, 0.5, 1]; Y=[350, 650, 600]
          LinearInterpolationFunction SenescenceDuration: XProperty=[Structure].RelativeNodeApperance
            XYPairs: X=[0, 11, 20]; Y=[359, 350, 350]
          Constant DetachmentLagDuration: Value=1000000
          Constant DetachmentDuration: Value=1000000
          LinearInterpolationFunction MaximumNConc: XProperty=[Structure].MainStemNodeNo
            XYPairs: X=[1, 10]; Y=[0.04, 0.02]
          Constant CriticalNConc: Value=0.015
          Constant MinimumNConc: Value=0.008
          AddFunction DroughtInducedSenAcceleration
            Constant One: Value=1
            MultiplyFunction Stress
              Constant StressResponseCoefficient: Value=1
              LinearInterpolationFunction StressFactor: XProperty=[Tef].WaterSupplyDemandRatio
                XYPairs: X=[0, 0.7]; Y=[0, 0]
          LinearInterpolationFunction SpecificLeafAreaMax: XProperty=[Structure].MainStemNodeNo
            XYPairs: X=[1, 9]; Y=[60000, 30000]
          LinearInterpolationFunction SpecificLeafAreaMin: XProperty=[Structure].MainStemNodeNo
            XYPairs: X=[1, 9]; Y=[6000, 6000]
          Constant StructuralFraction: Value=0.7
          Constant NonStructuralFraction: Value=0
          LinearInterpolationFunction ShadeInducedSenescenceRate: XProperty=[Leaf].CohortCurrentRankCoverAbove
            XYPairs: X=[0, 0.7, 0.8, 0.96, 0.99]; Y=[0, 0, 0, 0, 0]
          Constant InitialNConc: Value=0
        RUEModel Photosynthesis
          Constant RUE: Value=1.75
          WeightedTemperatureFunction FT: MaximumTemperatureWeighting=0.75
            XYPairs: X=[0, 8, 15, 35, 50]; Y=[0, 0, 1, 1, 0]
          LinearInterpolationFunction FVPD: XProperty=[Leaf].Photosynthesis.VPD
            XYPairs: X=[0, 10, 50]; Y=[1, 1, 1]
          LinearInterpolationFunction FN: XProperty=[Leaf].Fn
            XYPairs: X=[0, 1]; Y=[0.3, 1]
          LinearInterpolationFunction FW: XProperty=[Leaf].Fw
            XYPairs: X=[0, 0.3]; Y=[0, 1]
          RUECO2Function FCO2: PhotosyntheticPathway=C4
          VariableReference RadnInt: VariableName=[Leaf].RadIntTot
        MinimumFunction FRGRFunction
          VariableReference RUE_FT: VariableName=[Leaf].Photosynthesis.FT.Value
          MinimumFunction Others
            VariableReference RUE_FN: VariableName=[Leaf].Photosynthesis.FN.Value
            VariableReference RUE_FVPD: VariableName=[Leaf].Photosynthesis.FVPD.Value
        MultiplyFunction ExtinctionCoeff
          Memo
            Extinction coefficient is specified in terms of a potential extinction coefficient which is then discounted during periods of water stress to account for the impact of leaf curling.
            <br/>
          LinearInterpolationFunction PotentialExtinctionCoeff: XProperty=[Leaf].LAI
            XYPairs: X=[0, 0.45]; Y=[0.65, 0.65]
          LinearInterpolationFunction WaterStressImpact: XProperty=[Tef].WaterSupplyDemandRatio
            XYPairs: X=[0, 0.7]; Y=[0.5, 1]
        LinearInterpolationFunction FrostFraction: XProperty=[Weather].MinT
          XYPairs: X=[-10, -9]; Y=[1, 0]
        VariableReference ThermalTime: VariableName=[Phenology].ThermalTime.Value
      GenericAboveGroundOrgan Rachis: FractionRemoved=0; FractionToResidue=0
        MultiplyFunction CobNumber
          VariableReference StemNumber: VariableName=[Structure].TotalStemPopn
          Constant CobsPerStem: Value=1.1
        DivideFunction CobSize
          VariableReference CobMass: VariableName=[Rachis].Live.Wt
          VariableReference CobNumber: VariableName=[Rachis].CobNumber.Value
        PopulationBasedDemandFunction DMDemandFunction
          VariableReference ThermalTime: VariableName=[Phenology].ThermalTime.Value
          Constant ExpansionStress: Value=1
          Constant StartStage: Value=5.5
          Constant GrowthDuration: Value=300
          Constant MaximumOrganWt: Value=25
          VariableReference OrganPopulation: VariableName=[Rachis].CobNumber.Value
        Biomass Live
        Biomass Dead
        Constant NReallocationFactor: Value=0
        Constant NRetranslocationFactor: Value=0.1
        Constant MaximumNConc: Value=0.008
        Constant StructuralFraction: Value=1
        Constant MinimumNConc: Value=0.003
        LinearInterpolationFunction ExpansionStress: XProperty=[Maize].WaterSupplyDemandRatio
          XYPairs: X=[0, 0.6]; Y=[1, 1]
      GenericAboveGroundOrgan Husk: FractionRemoved=0; FractionToResidue=0
        PopulationBasedDemandFunction DMDemandFunction
          VariableReference ThermalTime: VariableName=[Phenology].ThermalTime.Value
          Constant ExpansionStress: Value=1
          Constant StartStage: Value=5.2
          Constant GrowthDuration: Value=120
          Constant MaximumOrganWt: Value=25
          VariableReference OrganPopulation: VariableName=[Rachis].CobNumber.Value
        Biomass Live
        Biomass Dead
        Constant NReallocationFactor: Value=0
        Constant NRetranslocationFactor: Value=0.1
        Constant MaximumNConc: Value=0.01
        Constant StructuralFraction: Value=0.2
        Constant MinimumNConc: Value=0.01
      GenericAboveGroundOrgan Stem: FractionRemoved=0; FractionToResidue=0
        Biomass Live
        Biomass Dead
        Constant StructuralFraction: Value=0.8
        LinearInterpolationFunction MaximumNConc: XProperty=[Structure].MainStemNodeNo
          XYPairs: X=[1, 10, 11]; Y=[0.03, 0.03, 0.005]
        Constant MinimumNConc: Value=0.006
        PhaseBasedSwitch NitrogenDemandSwitch: Start=Emergence; End=StartGrainFill
        Constant NReallocationFactor: Value=0
        Constant NRetranslocationFactor: Value=0.5
        Constant DMRetranslocationFactor: Value=0.5
        MinimumFunction DMDemandFunction
          MultiplyFunction PotentialDMAccumulation
            VariableReference NodesAppearing: VariableName=[Structure].DeltaNodeNumber
            VariableReference Branches: VariableName=[Structure].TotalStemPopn
            LinearInterpolationFunction PotentialInternodeWt: XProperty=[Structure].RelativeNodeApperance
              XYPairs: X=[0, 0.5, 1]; Y=[0, 0.2, 16]
          MultiplyFunction HightLimitedDMAccumulation
            Constant SpecificStemLengthMax: Value=500
            VariableReference Branches: VariableName=[Structure].TotalStemPopn
            VariableReference DeltaHeight: VariableName=[Structure].HeightModel.DeltaHeight
      Summariser
        CompositeBiomass AboveGround
          Propertys=[[Leaf].Live, [Leaf].Dead, [Stem].Live, [Stem].Dead, [Husk].Live, [Husk].Dead, [Grain].Live, [Grain].Dead, [Rachis].Live, [Rachis].Dead]
          Memo
            The AboveGround composite biomass object includes all organs occurring above the soil surface to allow output for total dry matter and Nutrient contents, including total structural, non-structural and metabolic pools.
            <br/>
        CompositeBiomass BelowGround: Propertys=[[Root].Live, [Root].Dead]
          Memo
            The BelowGround composite biomass object includes all root biomass pools to allow output for total dry matter and Nutrient contents, including total structural, non-structural and metabolic pools.
            <br/>
        CompositeBiomass Total
          Propertys=[[Leaf].Live, [Leaf].Dead, [Stem].Live, [Stem].Dead, [Husk].Live, [Husk].Dead, [Grain].Live, [Grain].Dead, [Rachis].Live, [Rachis].Dead, [Root].Live, [Root].Dead]
          Memo
            The Total composite biomass object includes all organs (above+below ground) to allow output for total dry matter and Nutrient contents, including total structural, non-structural and metabolic pools.
            <br/>
        CompositeBiomass TotalLive
          Propertys=[[Leaf].Live, [Stem].Live, [Husk].Live, [Grain].Live, [Rachis].Live, [Root].Live]
          Memo
            The TotalLive composite biomass object includes the Live pools of all organs (above+below ground) to allow output for total dry matter and Nutrient contents, including total structural, non-structural and metabolic pools.
            <br/>
        CompositeBiomass TotalDead
          Propertys=[[Leaf].Dead, [Stem].Dead, [Husk].Dead, [Grain].Dead, [Rachis].Dead, [Root].Dead]
          Memo
            The TotalDead composite biomass object includes the Dead pools of all organs (above+below ground) to allow output for total dry matter and Nutrient contents, including total structural, non-structural and metabolic pools.
            <br/>
        CompositeBiomass EarLive: Propertys=[[Husk].Live, [Grain].Live, [Rachis].Live]
          Memo
            The EarLive composite biomass object includes the Live pools of all organs within the Ear to allow output for total dry matter and Nutrient contents, including total structural, non-structural and metabolic pools.
            <br/>
        CompositeBiomass AboveGroundLive
          Propertys=[[Leaf].Live, [Stem].Live, [Husk].Live, [Grain].Live, [Rachis].Live]
          Memo
            The AboveGroundLive composite biomass object includes the Live pools of all organs occurring above the soil surface to allow output for total dry matter and Nutrient contents, including total structural, non-structural and metabolic pools.
            <br/>
        CompositeBiomass AboveGroundDead
          Propertys=[[Leaf].Dead, [Stem].Dead, [Husk].Dead, [Grain].Dead, [Rachis].Dead]
          Memo
            The AboveGroundDead composite biomass object includes the Dead pools of all organs occurring above the soil surface to allow output for total dry matter and Nutrient contents, including total structural, non-structural and metabolic pools.
            <br/>
      Cultivar Katumani
        Command:
          [Phenology].Juvenile.Target.Value = 50
          [Phenology].Photosensitive.Target.XYPairs.X = 0, 12.5, 24
          [Phenology].Photosensitive.Target.XYPairs.Y = 0, 0, 50
          [Phenology].FlagLeafToFlowering.Target.Value = 10
          [Phenology].FloweringToGrainFilling.Target.Value = 100
          [Phenology].GrainFilling.Target.Value = 400
          [Grain].NumberFunction.KernalsPerCob.XYPairs.X = 0, 14
          [Grain].NumberFunction.KernalsPerCob.XYPairs.Y = 0, 405
        Memo
          The variety Katumani Composite B was formed in 1966 and released in 1968 as part of the Tef breeding work undertaken at the Katumani Research Station in Kenya which started in 1956.  Katumani Composite B was an advanced generation of Katumani Synthetic V X Katumani Synthetic VI.  It has slight photoperiod sensitivity and relatively small potential cob size.<br/>
      Memo References
        <h2>References</h2>
        Brown, H.E., Huth, N.I., Holzworth, D.P., Teixeira, E.I., Zyskowski, R.F., Hargreaves, J.N., Moot, D.J., 2014. Plant modelling framework: software for building and running crop models on the APSIM platform. Environmental Modelling & Software 62 385-398.<br/>
        <br/>
        van Delden, S.H., Vos, J., Stomph, T.-J., Brouwer, G., Struik, P.C., 2012. Photoperiodism in Eragrostis tef: Analysis of ontogeny and morphology in response to photoperiod. European Journal of Agronomy 37(1) 105-114.<br/>
  Folder Misc
    Plant WheatPMFPrototype: CropType=Wheat
      Cultivar JerseyBenny: Alias=JerseyBenny
      OrganArbitrator Arbitrator: NArbitrationOption=PriorityThenRelativeAllocation; DMArbitrationOption=PriorityThenRelativeAllocation
      Phenology: Emerged=false
        MultiplyFunction ThermalTime
          PhaseLookup Temperature
            PhaseLookupValue SoilTemperature: Start=Sowing; End=TerminalSpikelet
              AirTemperatureFunction AirThermalTime
                XYPairs: X=[0, 26, 37]; Y=[0, 26, 0]
            PhaseLookupValue AirTemperature: Start=TerminalSpikelet; End=HarvestRipe
              AirTemperatureFunction AirThermalTime
                XYPairs: X=[0, 26, 37]; Y=[0, 26, 0]
          AddFunction DroughtPhenologyAcelleration
            Constant One: Value=1
            MultiplyFunction Stress
              Constant StressResponseCoefficient: Value=2
              LinearInterpolationFunction StressFactor: XProperty=[WheatPMFPrototype].WaterSupplyDemandRatio
                XYPairs: X=[0, 1]; Y=[0, 0]
        GerminatingPhase Germinating: Start=Sowing; End=Germination
        EmergingPhase Emerging: Start=Germination; End=Emergence; ShootLag=40; ShootRate=1.5
          VariableReference ThermalTime: VariableName=[Phenology].ThermalTime.Value
        GenericPhase Vegetative: Start=Emergence; End=TerminalSpikelet
          Constant Target: Value=401
          VariableReference ThermalTime: VariableName=[Phenology].ThermalTime.Value
          MinimumFunction Stress
            VariableReference VernalisationEffect: VariableName=[Phenology].Vernalisation.VernEff
            VariableReference PhotoperiodEffect: VariableName=[Phenology].Vernalisation.PhotopEff
        LeafAppearancePhase FloralInitiationToFlagLeaf: Start=TerminalSpikelet; End=FlagLeaf
          VariableReference ThermalTime: VariableName=[Phenology].ThermalTime.Value
        GenericPhase SpikeDevelopment: Start=FlagLeaf; End=Flowering
          Constant Target: Value=333
          VariableReference ThermalTime: VariableName=[Phenology].ThermalTime.Value
        GenericPhase GrainDevelopment: Start=Flowering; End=StartGrainFill
          Constant Target: Value=120
          VariableReference ThermalTime: VariableName=[Phenology].ThermalTime.Value
        GenericPhase GrainFilling: Start=StartGrainFill; End=EndGrainFill
          Constant Target: Value=545
          VariableReference ThermalTime: VariableName=[Phenology].ThermalTime.Value
        GenericPhase Maturing: Start=EndGrainFill; End=Maturity
          Constant Target: Value=200
          VariableReference ThermalTime: VariableName=[Phenology].ThermalTime.Value
        GenericPhase Ripening: Start=Maturity; End=HarvestRipe
          Constant Target: Value=300
          VariableReference ThermalTime: VariableName=[Phenology].ThermalTime.Value
        EndPhase ReadyForHarvesting: Start=HarvestRipe; End=Unused
          VariableReference ThermalTime: VariableName=[Phenology].ThermalTime.Value
        PhotoperiodFunction Photoperiod: Twilight=-6
        VernalisationCW Vernalisation: VernSens=2.5; PhotopSens=2; StartStageForEffects=Emergence; EndStageForEffects=TerminalSpikelet; StartStageForCumulativeVD=Germination; EndStageForCumulativeVD=TerminalSpikelet
          AirTemperatureFunction VDModel
            XYPairs: X=[0, 2, 15]; Y=[0, 1, 0]
          PhotoperiodFunction Photoperiod: Twilight=-6
      Structure: InitialiseStage=Emergence; PrimaryBudNo=1
        PhaseLookup MainStemPrimordiaInitiationRate
          PhaseLookupValue MainStemPrimordiaInitiationRate: Start=Emergence; End=TerminalSpikelet
            DivideFunction NodeInitiationRateFunction
              VariableReference Phyllochron
                VariableName=[Structure].MainStemNodeAppearanceRate.BasePhyllochron.Value
              Constant PrimordiaPerMainstemNode: Value=2
        MultiplyFunction MainStemNodeAppearanceRate
          LinearInterpolationFunction LeafStageFactor: XProperty=[Structure].MainStemNodeNo
            XYPairs: X=[0, 2, 7, 14]; Y=[0.6, 0.8, 1.3, 1.4]
          Constant BasePhyllochron: Value=120
        HeightFunction HeightModel
          LinearInterpolationFunction PotentialHeight: XProperty=[Phenology].Stage
            XYPairs: X=[3, 4, 4.8, 6, 7]; Y=[10, 50, 100, 1100, 1200]
          LinearInterpolationFunction WaterStress: XProperty=[WheatPMFPrototype].WaterSupplyDemandRatio
            XYPairs: X=[0.3, 1]; Y=[0, 1]
        MultiplyFunction BranchingRate
          PhaseLookup PotentialBranchingRate
            PhaseLookupValue Vegetative: Start=Emergence; End=TerminalSpikelet
              LinearInterpolationFunction PotentialBranchingRate: XProperty=[Leaf].AppearedCohortNo
                XYPairs: X=[1, 2, 5, 14]; Y=[0, 1, 2, 2]
            PhaseLookupValue Reproductive: Start=TerminalSpikelet; End=HarvestRipe
              Constant Zero: Value=0
          LinearInterpolationFunction WaterStress: XProperty=[WheatPMFPrototype].WaterSupplyDemandRatio
            XYPairs: X=[0, 1]; Y=[0, 1]
          LinearInterpolationFunction Shading: XProperty=[Leaf].CoverGreen
            XYPairs: X=[0, 0.6, 0.7]; Y=[1, 1, 0]
        PhaseLookup ShadeInducedBranchMortality
          PhaseLookupValue Vegetative: Start=Emergence; End=StartGrainFill
            LinearInterpolationFunction ShadeInducedBranchMortality: XProperty=[Leaf].CoverGreen
              XYPairs: X=[0, 0.98, 0.99, 1]; Y=[0, 0, 0.01, 0.01]
        PhaseLookup DroughtInducedBranchMortality
          PhaseLookupValue Vegetative: Start=Emergence; End=StartGrainFill
            LinearInterpolationFunction DroughtInducedBranchMortality: XProperty=[WheatPMFPrototype].WaterSupplyDemandRatio
              XYPairs: X=[0.1, 0.6]; Y=[0.1, 0]
        VariableReference ThermalTime: VariableName=[Phenology].ThermalTime.Value
        Constant MaximumMainStemNodeNumber: Value=18
        MainStemFinalNodeNumberFunction MainStemFinalNodeNumber: MaximumMainStemNodeNumber=0
      ReproductiveOrgan Grain: FractionRemoved=0; FractionToResidue=0; RipeStage=Ripe
        Biomass Live
        Biomass Dead
        Constant MaxNConcDailyGrowth: Value=0.03
        Constant WaterContent: Value=0.12
        Constant MinimumNConc: Value=0.006
        Constant MaximumNConc: Value=0.022
        PhaseBasedSwitch NitrogenDemandSwitch: Start=Germination; End=Maturity
        AccumulateFunction AccumThermalTime: StartStageName=Flowering; EndStageName=Maturity
          VariableReference DailyThermalTimeValue: VariableName=[Phenology].ThermalTime.Value
        AirTemperatureFunction FillingRate
          XYPairs: X=[0, 26, 30, 35]; Y=[0, 0.0015, 0.0015, 0.0015]
        AirTemperatureFunction NFillingRate
          XYPairs: X=[0, 25, 30, 35]; Y=[0, 55, 55, 55]
        PhaseLookup DMDemandFunction
          PhaseLookupValue Grainfilling: Start=StartGrainFill; End=EndGrainFill
            MinimumFunction
              MultiplyFunction Demand
                VariableReference GrainNumber: VariableName=[Grain].NumberFunction.Value
                AirTemperatureFunction FillingRate
                  XYPairs: X=[0, 26, 30, 35]; Y=[0, 0.0015, 0.0015, 0.0015]
              MultiplyFunction Capacity
                SubtractFunction IndividualGrainCapacity
                  Constant MaximumGrainSize: Value=0.042
                  DivideFunction CurrentSize
                    VariableReference Wt: VariableName=[Grain].Live.Wt
                    VariableReference GrainNumber: VariableName=[Grain].NumberFunction.Value
                VariableReference GrainNumber: VariableName=[Grain].NumberFunction.Value
        MultiplyFunction NumberFunction
          VariableReference StemNumber: VariableName=[Structure].TotalStemPopn
          LinearInterpolationFunction GrainsPerSpike: XProperty=[Spike].Live.Wt
            XYPairs: X=[0, 1]; Y=[0, 80]
          Constant FertileTillers: Value=1
      Root: FractionRemoved=0; FractionToResidue=0; InitialDM=0.2; SpecificRootLength=40000; KNO3_yProperty=[0.03, 0.03]; KNO3_xRootLength=[0, 0.003]; KNH4_yProperty=[0, 0]; KNH4_xRootLength=[0, 0.003]; NuptakeSupply=0
        CompositeBiomass Live: Propertys=[[Root].LayerLive]
        CompositeBiomass Dead: Propertys=[[Root].LayerDead]
        LinearInterpolationFunction KLModifier: XProperty=[Leaf].LAI
          XYPairs: X=[0, 3]; Y=[1, 1]
        Constant SoilWaterEffect: Value=1
        AirTemperatureFunction TemperatureEffect
          XYPairs: X=[0, 26, 35]; Y=[1, 1, 1]
        Constant MaxDailyNUptake: Value=20
        Constant SenescenceRate: Value=0
        Constant StructuralFraction: Value=1
        Constant MaximumNConc: Value=0.01
        Constant MinimumNConc: Value=0.01
        Constant PartitionFraction: Value=0.1
        PhaseLookup RootFrontVelocity
          PhaseLookupValue PreEmergence: Start=Germination; End=Emergence
            Constant Function: Value=5
          PhaseLookupValue PostEmergence: Start=Emergence; End=Maturity
            Constant Function: Value=30
        PhaseBasedSwitch NitrogenDemandSwitch: Start=Germination; End=Maturity
      Leaf: MaxCover=1; KDead=0.03; GsMax=0.03; R50=200; Emissivity=0.96; Albido=0.26
        zero: FractionRemoved, FractionToResidue, CurrentExpandingLeaf, StartFractionExpanded, FractionNextleafExpanded, _ExpandedNodeNo, DeadNodesYesterday, FRGR, PotentialEP, FractionDied
        LeafCohort InitialLeaves[1]: Rank=1; Area=200
        LeafCohort InitialLeaves[2]: Rank=2; Area=0
        CompositeBiomass Live: Propertys=[[Leaf].CohortLive]
        CompositeBiomass Dead: Propertys=[[Leaf].CohortDead]
        ArrayBiomass CohortArrayLive: Propertys=[[Leaf].Live]; ArraySize=[Leaf].MaxNodeNo
        ArrayBiomass CohortArrayDead: Propertys=[[Leaf].Dead]; ArraySize=[Leaf].MaxNodeNo
        LeafCohortParameters CohortParameters
          Constant NReallocationFactor: Value=0.05
          Constant NRetranslocationFactor: Value=0.1
          Constant DMReallocationFactor: Value=1
          Constant DMRetranslocationFactor: Value=0.5
          LinearInterpolationFunction CellDivisionStress: XProperty=[WheatPMFPrototype].WaterSupplyDemandRatio
            XYPairs: X=[0.5, 1]; Y=[0.1, 1]
          LinearInterpolationFunction ExpansionStress: XProperty=[WheatPMFPrototype].WaterSupplyDemandRatio
            XYPairs: X=[0.3, 1]; Y=[0, 1]
          MultiplyFunction GrowthDuration
            VariableReference Phyllochron
              VariableName=[Structure].MainStemNodeAppearanceRate.BasePhyllochron.Value
            LinearInterpolationFunction NumberOfExpandingLeaves: XProperty=[Structure].RelativeNodeApperance
              XYPairs: X=[0, 1]; Y=[1, 1]
          Constant LagDuration: Value=900
          Constant SenescenceDuration: Value=200
          Constant DetachmentLagDuration: Value=1000000
          Constant DetachmentDuration: Value=1000000
          Constant RelativeBranchLeafSize: Value=1
          Constant MaximumNConc: Value=0.063
          Constant CriticalNConc: Value=0.05
          Constant MinimumNConc: Value=0.01
          AddFunction DroughtInducedSenAcceleration
            Constant One: Value=1
            MultiplyFunction Stress
              Constant StressResponseCoefficient: Value=1
              LinearInterpolationFunction StressFactor: XProperty=[WheatPMFPrototype].WaterSupplyDemandRatio
                XYPairs: X=[0, 0.7]; Y=[1, 0]
          LinearInterpolationFunction SpecificLeafAreaMax: XProperty=[Structure].MainStemNodeNo
            XYPairs: X=[0, 9]; Y=[20000, 20000]
          LinearInterpolationFunction SpecificLeafAreaMin: XProperty=[Structure].MainStemNodeNo
            XYPairs: X=[0, 9]; Y=[10000, 10000]
          Constant InitialNConc: Value=0
          Constant StructuralFraction: Value=0.5
          Constant NonStructuralFraction: Value=0
          LinearInterpolationFunction ShadeInducedSenescenceRate: XProperty=[Leaf].CohortCurrentRankCoverAbove
            XYPairs: X=[0, 0.7, 0.8, 0.97, 0.98]; Y=[0, 0, 0, 0, 0]
          MultiplyFunction MaxArea
            LinearInterpolationFunction Length: XProperty=[Structure].MainStemNodeNo
              XYPairs: X=[1, 10, 15]; Y=[100, 270, 200]
            LinearInterpolationFunction Width: XProperty=[Structure].MainStemNodeNo
              XYPairs: X=[1, 9, 15]; Y=[4, 14, 22]
            Constant TaperFactor: Value=0.61
        RUEModel Photosynthesis
          Constant RUE: Value=1.24
          WeightedTemperatureFunction FT: MaximumTemperatureWeighting=0.75
            XYPairs: X=[0, 10, 25, 35]; Y=[0, 1, 1, 0]
          LinearInterpolationFunction FVPD: XProperty=[Leaf].Photosynthesis.VPD
            XYPairs: X=[0, 10, 50]; Y=[1, 1, 1]
          LinearInterpolationFunction FN: XProperty=[Leaf].Fn
            XYPairs: X=[0, 1, 1.5]; Y=[0, 1, 1]
          LinearInterpolationFunction FW: XProperty=[Leaf].Fw
            XYPairs: X=[0, 0.3]; Y=[0, 1]
          RUECO2Function FCO2: PhotosyntheticPathway=C3
        MultiplyFunction ExtinctionCoeff
          LinearInterpolationFunction PotentialExtinctionCoeff: XProperty=[Leaf].LAI
            XYPairs: X=[0, 0.45]; Y=[0.7, 0.7]
          LinearInterpolationFunction WaterStress: XProperty=[WheatPMFPrototype].WaterSupplyDemandRatio
            XYPairs: X=[0, 0.7]; Y=[0.5, 1]
        LinearInterpolationFunction FrostFraction: XProperty=[Weather].MinT
          XYPairs: X=[-1, 0]; Y=[0, 0]
        VariableReference ThermalTime: VariableName=[Phenology].ThermalTime.Value
      GenericAboveGroundOrgan Spike: FractionRemoved=0; FractionToResidue=0
        PopulationBasedDemandFunction DMDemandFunction
          VariableReference ThermalTime: VariableName=[Phenology].ThermalTime.Value
          Constant ExpansionStress: Value=1
        Biomass Live
        Biomass Dead
        Constant NReallocationFactor: Value=0
        Constant NRetranslocationFactor: Value=0.1
        Constant MaximumNConc: Value=0.01
        Constant StructuralFraction: Value=1
        Constant MinimumNConc: Value=0.01
      GenericAboveGroundOrgan Stem: FractionRemoved=0; FractionToResidue=0
        Biomass Live
        Biomass Dead
        MinimumFunction DMDemandFunction
          MultiplyFunction NodeNumberLimitedDemand
            LinearInterpolationFunction SpecificStemDensityMax: XProperty=[Phenology].Stage
              XYPairs: X=[3, 4, 6]; Y=[0, 6, 30]
            VariableReference DeltaNodes: VariableName=[Structure].DeltaNodeNumber
            VariableReference Stems: VariableName=[Structure].TotalStemPopn
          MultiplyFunction HeightLimitedDemand
            Constant SpecificStemLengthMax: Value=0.022
            VariableReference DeltaHeight: VariableName=[Structure].HeightModel.DeltaHeight
            VariableReference Stems: VariableName=[Structure].TotalStemPopn
        Constant StructuralFraction: Value=0.7
        LinearInterpolationFunction MaximumNConc: XProperty=[Phenology].Stage
          XYPairs: X=[3, 4, 5.3]; Y=[0.06, 0.06, 0.025]
        Constant MinimumNConc: Value=0.006
        PhaseBasedSwitch NitrogenDemandSwitch: Start=Emergence; End=StartGrainFill
        Constant NReallocationFactor: Value=0
        Constant NRetranslocationFactor: Value=0.5
        Constant DMRetranslocationFactor: Value=0.5
      Summariser
        CompositeBiomass AboveGround
          Propertys=[[Leaf].Live, [Leaf].Dead, [Stem].Live, [Stem].Dead, [Spike].Live, [Spike].Dead, [Grain].Live, [Grain].Dead]
        CompositeBiomass BelowGround: Propertys=[[Root].Live, [Root].Dead]
        CompositeBiomass Total
          Propertys=[[Leaf].Live, [Leaf].Dead, [Stem].Live, [Stem].Dead, [Root].Live, [Root].Dead, [Spike].Live, [Spike].Dead, [Grain].Live, [Grain].Dead]
        CompositeBiomass TotalLive
          Propertys=[[Leaf].Live, [Stem].Live, [Root].Live, [Spike].Live, [Grain].Live]
        CompositeBiomass TotalDead
          Propertys=[[Leaf].Dead, [Stem].Dead, [Root].Dead, [Spike].Dead, [Grain].Dead]
  DataStore
    ExcelInput Observed: FileName=Observed.xlsx; SheetNames=[ObservedHarvestData]
    PredictedObserved: PredictedTableName=HarvestReport; ObservedTableName=ObservedHarvestData; FieldNameUsedForMatch=Stage
  Folder Ethiopia
    Experiment Jamma
      Memo
        ;From

        Soil Characterization and Evaluation of Slow Release Urea Fertilizer Rates on Yield Traits and Grain Yields of Wheat and Teff on Vertisols of Jamma District of South Wollo Zone, Amhara Region b0

        By

        Abebe Getu (BSc), Hawassa University, Ethiopia
      Factors
        Factor Crop: Specifications=[Sowing]
          Operations Teff
            1990-05-20  [Tef].Sow(population:100., cultivar:"Katumani", depth:50, rowSpacing:250);
        Factor NRate: Specifications=[NRate]
          Operations 0NUSG
            1990-07-29  [Fertiliser].Apply(0, Fertiliser.Types.UreaN, 10);
          Operations 23NUSG
            1990-07-29  [Fertiliser].Apply(23, Fertiliser.Types.UreaN, 10);
          Operations 46NUSG
            1990-07-29  [Fertiliser].Apply(46, Fertiliser.Types.UreaN, 10);
          Operations 69NUSG
            1990-07-29  [Fertiliser].Apply(69, Fertiliser.Types.UreaN, 10);
          Operations 46NUC
            1990-07-29  [Fertiliser].Apply(46, Fertiliser.Types.UreaN, 10);
      Simulation Jamma: Area=0; Slope=0
        Weather: FileName=%root%\Prototypes\Chickpea\cooper.met
        Clock: StartDate=1990-01-01; EndDate=1990-12-31
        Summary summaryfile
        SoilArbitrator Soil Arbitrator
        Zone Field: Area=1; Slope=0
          MicroClimate: air_pressure=1010; soil_emissivity=0.96; sun_angle=15; soil_heat_flux_fraction=0.4; night_interception_fraction=0.5; windspeed_default=3; refheight=2; albedo=0.15; emissivity=0.96; gsmax=0.01; r50=200; a_interception=0; b_interception=1; c_interception=0; d_interception=0; soil_albedo=0.23
          Irrigation
          Fertiliser
          SurfaceOrganicMatter: PoolName=maize; type=maize; mass=500; standing_fraction=0; cnr=65; CriticalResidueWeight=2000; OptimumDecompTemp=20; MaxCumulativeEOS=20; CNRatioDecompCoeff=0.277; CNRatioDecompThreshold=25; TotalLeachRain=25; MinRainToLeach=10; CriticalMinimumOrganicC=0.004; DefaultCPRatio=0; DefaultStandingFraction=0; StandingExtinctCoeff=0.5; FractionFaecesAdded=0.5
            Pools:
              {PoolName=maize, ResidueType=maize, Mass=500, CNRatio=65, StandingFraction=0}
            ResidueTypes ResidueTypesList: LoadFromResource=ResidueTypes
          Operations Sowing
          Operations NRate
            1985-11-08  [Fertiliser].Apply(50, Fertiliser.Types.NH4NO3N, 10);
            1985-11-29  [Fertiliser].Apply(30, Fertiliser.Types.NH4NO3N, 10);
          Report: EventNames=[Clock].DoReport
            VariableNames:
              [Clock].Today
              [Soil].SoilWater.SW
              [Soil].SoilWater.Eo
              [Soil].SoilWater.Es
              [Soil].SoilWater.Drainage
              [Soil].SoilWater.Runoff
              [Soil].SoilWater.pond
              sum([Soil].SoilWater.SWmm) as ProfileWater
              [Soil].NO3N
              [MicroClimate].net_radn
              [MicroClimate].peta
              [MicroClimate].petr
          Soil: Latitude=0; Longitude=0
            Water
              Thickness  BD    AirDry  LL15   DUL    SAT
              150        1.32  0.1     0.31   0.413  0.453
              150        1.32  0.1     0.31   0.413  0.453
              150        1.38  0.26    0.313  0.454  0.479
              300        1.33  0.32    0.376  0.495  0.498
              300        1.33  0.3     0.356  0.495  0.498
              300        1.42  0.27    0.3    0.418  0.464
              300        1.33  0.24    0.303  0.4    0.457
              300        1.35  0.31    0.31   0.37   0.435
              400        1.4   0.16    0.16   0.29   0.38
              SoilCrop WheatSoil: LL=[0.25, 0.25, 0.26, 0.32, 0.3, 0.27, 0.303, 0.31, 0.16]; KL=[0.06, 0.06, 0.06, 0.06, 0.05, 0.04, 0.02, 0.02, 0.01]; XF=[1, 1, 1, 1, 1, 1, 1, 1, 1]
              SoilCrop TefSoil: LL=[0.25, 0.25, 0.26, 0.32, 0.3, 0.27, 0.303, 0.31, 0.16]; KL=[0.06, 0.06, 0.06, 0.06, 0.05, 0.04, 0.02, 0.02, 0.01]; XF=[1, 1, 1, 1, 1, 1, 1, 1, 1]
            SoilWater: residueinterception=0; SummerDate=1-Nov; SummerU=9; SummerCona=3; WinterDate=1-Apr; WinterU=9; WinterCona=3; DiffusConst=88; DiffusSlope=35.4; Salb=0.13; CN2Bare=50; CNRed=20; CNCov=0.8; max_pond=0; Thickness=[100, 100, 100, 200, 200, 200, 200, 200, 200]; SWCON=[0.5, 0.5, 0.5, 0.5, 0.5, 0.5, 0.5, 0.5, 0.5]
            SoilNitrogen: fom_type=[default, manure, mucuna, lablab, shemp, stable]; fract_carb=[0.2, 0.3, 0.54, 0.57, 0.45, 0]; fract_cell=[0.7, 0.3, 0.37, 0.37, 0.47, 0.1]; fract_lign=[0.1, 0.4, 0.09, 0.06, 0.08, 0.9]; wfpsN2N2O_x=[22, 88]; wfpsN2N2O_y=[0.1, 1]
            SoilOrganicMatter: RootCN=45; RootWt=1000; SoilCN=14.5; EnrACoeff=7.4; EnrBCoeff=0.2; OCUnits=Total
              Thickness  OC    FBiom  FInert
              100        1.2   0.02   0.42
              100        1     0.01   0.5
              100        0.86  0.01   0.58
              200        0.83  0.01   0.55
              200        0.58  0.01   0.86
              200        0.54  0.01   0.9
              200        0.47  0.01   0.95
              200        0.5   0.01   0.95
              200        0.5   0.01   0.95
            Analysis: Thickness=[100, 100, 100, 200, 200, 200, 200, 200, 200]; PH=[6, 6, 6, 6.2, 6.5, 6.7, 6.8, 6.8, 6.8]; PHUnits=Water; BoronUnits=HotWater
            Sample InitialN: NO3Units=ppm; NH4Units=ppm; SWUnits=Volumetric; OCUnits=Total; PHUnits=Water
              Thickness  NO3   NH4
              150        14.4  0.6
              150        6.58  0.1
              300        2.45  0.1
              300        1.08  0.1
              300        0.15  0.1
              300        0.83  0.1
              300        2.3   0.1
            Sample InitialSW: Thickness=[150, 150, 300, 300, 300, 300, 300]; SW=[0.413, 0.456, 0.408, 0.374, 0.327, 0.325, 0.371]; NO3Units=ppm; NH4Units=ppm; SWUnits=Volumetric; OCUnits=Total; PHUnits=Water
          Report HarvestReport: EventNames=[Tef].Harvesting
            VariableNames:
              [Clock].Today
              [Tef].Phenology.CurrentStageName as Stage
              [Tef].Summariser.AboveGround.Wt as Biomass
              [Tef].Grain.Yield
              [Tef].Grain.Size as GrainSize
              [Tef].Grain.Live.Wt as GrainWt
              [Tef].Structure.MainStemFinalNodeNo
              [Tef].Phenology.FloweringDAS.Value as FloweringDAS
              [Tef].Phenology.MaturityDAS.Value  as MaturityDAS
          Manager TefHarvesting
```csharp
using System;
using Models.Core;
using System.Collections.Generic;
using System.Text;
using Models.Soils;
using Models.PMF;
using Models;
using System.Xml.Serialization;
using APSIM.Shared.Utilities;

namespace Models
{
	[Serializable] 
	public class Script : Model
	{      
		[Link] Plant Tef;          
		[Link] Zone zone;			
					
        
        [EventSubscribe("Commencing")]
        private void OnSimulationCommencing(object sender, EventArgs e)
        {
		}	   
		
		[EventSubscribe("DoManagement")]
		private void OnDoManagement(object sender, EventArgs e)
		{
        if (Tef.Phenology.CurrentPhaseName=="ReadyForHarvesting")
           {
           Tef.Harvest();
           Tef.EndCrop();
           }
		}
		
		[EventSubscribe("DoManagementCalculations")]
		private void OnDoManagementCalculations(object sender, EventArgs e)
		{
			
		}
	}
}
```
          Plant Tef: CropType=Chickpea
    Experiment Ofla
      Memo
        SOIL FERTILITY CHARACTERIZATION AND RESPONSE OF WHEAT (iTriticum aestivum) i0AND TEFF (iEragrostis tefi0) TO DIFFERENT RATES OF SLOW RELEASE AND CONVENTIONAL UREA FERTILIZERS IN VERTISOLS OF OFLA DISTRICT, SOUTHERN TIGRAY, ETHIOPIA b0bMSc THESIS b0bOKUBAY GIDAY
      Factors
        Factor Crop: Specifications=[Sowing]
          Operations Teff
            1990-05-20  [Tef].Sow(population:100., cultivar:"Katumani", depth:50, rowSpacing:250);
        Factor NRate: Specifications=[NRate]
          Operations 0NUSG
            1990-07-29  [Irrigation].Apply(amount:100, depth:0,efficiency:1, willRunoff:false);
          Operations 23NUSG
            1990-07-29  [Irrigation].Apply(amount:100, depth:0,efficiency:1, willRunoff:false);
          Operations 46NUSG
            1990-07-29  [Irrigation].Apply(amount:100, depth:0,efficiency:1, willRunoff:false);
          Operations 69NUSG
            1990-07-29  [Irrigation].Apply(amount:100, depth:0,efficiency:1, willRunoff:false);
          Operations 46NUC
            1990-07-29  [Irrigation].Apply(amount:100, depth:0,efficiency:1, willRunoff:false);
      Simulation Ofla: same as Ethiopia.Jamma.Jamma
    Experiment CWP2010
      Memo
        From Crop Water Productivity of Irrigated Teff in a WaterStressed RegionYenesew Mengiste Yihun & Abraham Mehari Haile &Bart Schultz & Teklu ErkossaWater Resour Manage (2013) 27:31153125
      Factors
        Factor Pop: Specifications=[Sowing]
          Operations Low
            2010-11-15  [Tef].Sow(population:100., cultivar:"Katumani", depth:50, rowSpacing:250);
          Operations High
            2010-11-15  [Tef].Sow(population:100., cultivar:"Katumani", depth:50, rowSpacing:250);
        Factor Treatment: Specifications=[IrrigationRate]
          Operations 1
            1990-07-29  [Irrigation].Apply(amount:100, depth:0,efficiency:1, willRunoff:false);
          Operations 2
            1990-07-29  [Irrigation].Apply(amount:100, depth:0,efficiency:1, willRunoff:false);
          Operations 3
            1990-07-29  [Irrigation].Apply(amount:100, depth:0,efficiency:1, willRunoff:false);
          Operations 4
            1990-07-29  [Irrigation].Apply(amount:100, depth:0,efficiency:1, willRunoff:false);
          Operations 5
            1990-07-29  [Irrigation].Apply(amount:100, depth:0,efficiency:1, willRunoff:false);
          Operations 6
            1990-07-29  [Irrigation].Apply(amount:100, depth:0,efficiency:1, willRunoff:false);
          Operations 7
            1990-07-29  [Irrigation].Apply(amount:100, depth:0,efficiency:1, willRunoff:false);
          Operations 8
            1990-07-29  [Irrigation].Apply(amount:100, depth:0,efficiency:1, willRunoff:false);
          Operations 9
            1990-07-29  [Irrigation].Apply(amount:100, depth:0,efficiency:1, willRunoff:false);
          Operations 10
            1990-07-29  [Irrigation].Apply(amount:100, depth:0,efficiency:1, willRunoff:false);
          Operations 11
            1990-07-29  [Irrigation].Apply(amount:100, depth:0,efficiency:1, willRunoff:false);
          Operations 12
            1990-07-29  [Irrigation].Apply(amount:100, depth:0,efficiency:1, willRunoff:false);
          Operations 13
            1990-07-29  [Irrigation].Apply(amount:100, depth:0,efficiency:1, willRunoff:false);
          Operations 14
            1990-07-29  [Irrigation].Apply(amount:100, depth:0,efficiency:1, willRunoff:false);
          Operations 15
            1990-07-29  [Irrigation].Apply(amount:100, depth:0,efficiency:1, willRunoff:false);
          Operations 16
            1990-07-29  [Irrigation].Apply(amount:100, depth:0,efficiency:1, willRunoff:false);
      Simulation CWP: Area=0; Slope=0
        Weather: FileName=MelkasaGY.met
        Clock: StartDate=2010-11-01; EndDate=2011-03-31
        Summary summaryfile
        SoilArbitrator Soil Arbitrator
        Zone Field: Area=1; Slope=0
          MicroClimate: same as Ethiopia.Jamma.Jamma.Field.MicroClimate
          Irrigation
          Fertiliser
          SurfaceOrganicMatter: same as Ethiopia.Jamma.Jamma.Field.SurfaceOrganicMatter
          Operations Sowing
          Operations NRate
            1985-11-08  [Fertiliser].Apply(50, Fertiliser.Types.NH4NO3N, 10);
            1985-11-29  [Fertiliser].Apply(30, Fertiliser.Types.NH4NO3N, 10);
          Operations IrrigationRate
          Report: EventNames=[Clock].DoReport
            VariableNames:
              [Clock].Today
              [Soil].SoilWater.SW
              [Soil].SoilWater.Eo
              [Soil].SoilWater.Es
              [Soil].SoilWater.Drainage
              [Soil].SoilWater.Runoff
              [Soil].SoilWater.pond
              sum([Soil].SoilWater.SWmm) as ProfileWater
              [Soil].NO3N
              [MicroClimate].net_radn
              [MicroClimate].peta
              [MicroClimate].petr
              Tef.Leaf.LAI
          Soil: same as Ethiopia.Jamma.Jamma.Field.soil
          Report HarvestReport: same as Ethiopia.Jamma.Jamma.Field.HarvestReport
          Manager TefHarvesting: same as Ethiopia.Jamma.Jamma.Field.TefHarvesting
          Plant Tef: CropType=Chickpea
    Experiment CWP2011
      Memo
        From Crop Water Productivity of Irrigated Teff in a WaterStressed RegionYenesew Mengiste Yihun & Abraham Mehari Haile &Bart Schultz & Teklu ErkossaWater Resour Manage (2013) 27:31153125
      Factors
        Factor Treatment: same as Ethiopia.CWP2010.Factors.Treatment
      Simulation CWP2011: Area=0; Slope=0
        Weather: FileName=MelkasaGY.met
        Clock: StartDate=2011-12-01; EndDate=2012-04-30
        Summary summaryfile
        SoilArbitrator Soil Arbitrator
        Zone Field: Area=1; Slope=0
          MicroClimate: same as Ethiopia.Jamma.Jamma.Field.MicroClimate
          Irrigation
          Fertiliser
          SurfaceOrganicMatter: same as Ethiopia.Jamma.Jamma.Field.SurfaceOrganicMatter
          Operations Sowing
            2011-12-01  [Tef].Sow(population:100., cultivar:"Katumani", depth:50, rowSpacing:250);
          Operations NRate
            1985-11-08  [Fertiliser].Apply(50, Fertiliser.Types.NH4NO3N, 10);
            1985-11-29  [Fertiliser].Apply(30, Fertiliser.Types.NH4NO3N, 10);
          Operations IrrigationRate
          Report: same as Ethiopia.CWP2010.CWP.Field.Report
          Soil: same as Ethiopia.Jamma.Jamma.Field.soil
          Report HarvestReport: same as Ethiopia.Jamma.Jamma.Field.HarvestReport
          Manager TefHarvesting: same as Ethiopia.Jamma.Jamma.Field.TefHarvesting
          Plant Tef: CropType=Chickpea
    Experiment Mekelle2008
      Memo
        ;

        ### From

        Simulating yield response to water of Teff (Eragrostis tef) with FAOs AquaCrop

        model

        A. Araya a,b,*, S.D. Keesstra b, L. Stroosnijder b

        ###

        Field Crops Research 116 (2010) 196204
      Factors
        Factor Irrigation: Specifications=[IrrigationRate]
          Operations 0
          Operations 2
            2008-09-17  [Irrigation].Apply(amount:10, depth:0,efficiency:1, willRunoff:false);
            2008-09-19  [Irrigation].Apply(amount:10, depth:0,efficiency:1, willRunoff:false);
          Operations 4
            2008-09-17  [Irrigation].Apply(amount:10, depth:0,efficiency:1, willRunoff:false);
            2008-09-19  [Irrigation].Apply(amount:10, depth:0,efficiency:1, willRunoff:false);
            2008-09-21  [Irrigation].Apply(amount:12, depth:0,efficiency:1, willRunoff:false);
            2008-09-24  [Irrigation].Apply(amount:15, depth:0,efficiency:1, willRunoff:false);
          Operations 6
            2008-09-17  [Irrigation].Apply(amount:10, depth:0,efficiency:1, willRunoff:false);
            2008-09-19  [Irrigation].Apply(amount:10, depth:0,efficiency:1, willRunoff:false);
            2008-09-21  [Irrigation].Apply(amount:12, depth:0,efficiency:1, willRunoff:false);
            2008-09-24  [Irrigation].Apply(amount:15, depth:0,efficiency:1, willRunoff:false);
            2008-09-29  [Irrigation].Apply(amount:12, depth:0,efficiency:1, willRunoff:false);
            2008-10-03  [Irrigation].Apply(amount:12, depth:0,efficiency:1, willRunoff:false);
          Operations 8
            2008-09-17  [Irrigation].Apply(amount:10, depth:0,efficiency:1, willRunoff:false);
            2008-09-19  [Irrigation].Apply(amount:10, depth:0,efficiency:1, willRunoff:false);
            2008-09-21  [Irrigation].Apply(amount:12, depth:0,efficiency:1, willRunoff:false);
            2008-09-24  [Irrigation].Apply(amount:15, depth:0,efficiency:1, willRunoff:false);
            2008-09-29  [Irrigation].Apply(amount:12, depth:0,efficiency:1, willRunoff:false);
            2008-10-03  [Irrigation].Apply(amount:12, depth:0,efficiency:1, willRunoff:false);
            2008-10-07  [Irrigation].Apply(amount:12, depth:0,efficiency:1, willRunoff:false);
            2008-10-09  [Irrigation].Apply(amount:12, depth:0,efficiency:1, willRunoff:false);
      Simulation Mekelle: Area=0; Slope=0
        Weather: FileName=mekelleGY.met
        Clock: StartDate=2008-08-01; EndDate=2008-12-31
        Summary summaryfile
        SoilArbitrator Soil Arbitrator
        Zone Field: Area=1; Slope=0
          MicroClimate: same as Ethiopia.Jamma.Jamma.Field.MicroClimate
          Irrigation
          Fertiliser
          SurfaceOrganicMatter: same as Ethiopia.Jamma.Jamma.Field.SurfaceOrganicMatter
          Operations Sowing
            2008-08-02  [Tef].Sow(population:100., cultivar:"Katumani", depth:50, rowSpacing:250);
          Operations NRate
            1985-11-08  [Fertiliser].Apply(50, Fertiliser.Types.NH4NO3N, 10);
            1985-11-29  [Fertiliser].Apply(30, Fertiliser.Types.NH4NO3N, 10);
          Operations IrrigationRate
          Report: EventNames=[Clock].DoReport
            VariableNames:
              [Clock].Today
              [Soil].SoilWater.SW
              [Soil].SoilWater.Eo
              [Soil].SoilWater.Es
              [Soil].SoilWater.Drainage
              [Soil].SoilWater.Runoff
              [Soil].SoilWater.pond
              sum([Soil].SoilWater.SWmm) as ProfileWater
              sum([Soil].NO3N) as ProfileNO3
              [MicroClimate].net_radn
              [MicroClimate].peta
              [MicroClimate].petr
              [Tef].Leaf.LAI
              [Tef].Summariser.Total.Wt as AboveGroundBiomass
              [Tef].Grain.Live.Wt as GrainWt
              [Tef].Grain.Size as GrainSize
              [Tef].Leaf.Transpiration
              [Tef].Root.Depth
              [Tef].Leaf.Fw
              [Tef].Leaf.Fn
              [Tef].Leaf.Photosynthesis.Value
              [Tef].Stem.Live.Wt
              [Tef].Husk.Live.Wt
              [Tef].Rachis.Live.Wt
              [Tef].Leaf.Total.Wt
              [Tef].Rachis.DMDemandFunction.Value
              [Tef].Leaf.Live.Wt
              [Tef].Leaf.Dead.Wt
          Soil: same as Ethiopia.Jamma.Jamma.Field.soil
          Report HarvestReport: EventNames=[Tef].Harvesting
            VariableNames:
              [Clock].Today
              [Tef].Phenology.CurrentStageName as Stage
              [Tef].Summariser.AboveGround.Wt as Biomass
              [Tef].Grain.Yield
              [Tef].Grain.Size as GrainSize
              [Tef].Grain.Live.Wt as GrainWt
              [Tef].Structure.MainStemFinalNodeNo
              [Tef].Phenology.FloweringDAS.Value as FloweringDAS
              [Tef].Phenology.MaturityDAS.Value  as MaturityDASS
          Manager TefHarvesting
            script: same as in Ethiopia.Jamma.Jamma.Field.TefHarvesting
          Plant Tef: CropType=Chickpea
    Experiment Mekelle2009
      Memo
        ;

        ### From

        Simulating yield response to water of Teff (Eragrostis tef) with FAOs AquaCrop

        model

        A. Araya a,b,*, S.D. Keesstra b, L. Stroosnijder b

        ###

        Field Crops Research 116 (2010) 196204
      Factors
        Factor Irrigation: Specifications=[IrrigationRate]
          Operations 0
          Operations 4
            2009-09-17  [Irrigation].Apply(amount:10, depth:0,efficiency:1, willRunoff:false);
            2009-09-19  [Irrigation].Apply(amount:10, depth:0,efficiency:1, willRunoff:false);
            2009-09-20  [Irrigation].Apply(amount:10, depth:0,efficiency:1, willRunoff:false);
            2009-09-24  [Irrigation].Apply(amount:10, depth:0,efficiency:1, willRunoff:false);
          Operations 9
            2009-09-17  [Irrigation].Apply(amount:10, depth:0,efficiency:1, willRunoff:false);
            2009-09-19  [Irrigation].Apply(amount:10, depth:0,efficiency:1, willRunoff:false);
            2009-09-20  [Irrigation].Apply(amount:10, depth:0,efficiency:1, willRunoff:false);
            2009-09-24  [Irrigation].Apply(amount:10, depth:0,efficiency:1, willRunoff:false);
            2009-09-27  [Irrigation].Apply(amount:10, depth:0,efficiency:1, willRunoff:false);
            2009-10-01  [Irrigation].Apply(amount:10, depth:0,efficiency:1, willRunoff:false);
            2009-10-03  [Irrigation].Apply(amount:10, depth:0,efficiency:1, willRunoff:false);
            2009-10-05  [Irrigation].Apply(amount:10, depth:0,efficiency:1, willRunoff:false);
            2009-10-07  [Irrigation].Apply(amount:10, depth:0,efficiency:1, willRunoff:false);
      Simulation Mekelle2009: Area=0; Slope=0
        Weather: FileName=mekelleGY.met
        Clock: StartDate=2009-07-31; EndDate=2009-12-31
        Summary summaryfile
        SoilArbitrator Soil Arbitrator
        Zone Field: Area=1; Slope=0
          MicroClimate: same as Ethiopia.Jamma.Jamma.Field.MicroClimate
          Irrigation
          Fertiliser
          SurfaceOrganicMatter: same as Ethiopia.Jamma.Jamma.Field.SurfaceOrganicMatter
          Operations Sowing
            2009-07-31  [Tef].Sow(population:100., cultivar:"Katumani", depth:50, rowSpacing:250);
          Operations NRate
            1985-11-08  [Fertiliser].Apply(50, Fertiliser.Types.NH4NO3N, 10);
            1985-11-29  [Fertiliser].Apply(30, Fertiliser.Types.NH4NO3N, 10);
          Operations IrrigationRate
          Report: EventNames=[Clock].DoReport
            VariableNames:
              [Clock].Today
              [Soil].SoilWater.SW
              [Soil].SoilWater.Eo
              [Soil].SoilWater.Es
              [Soil].SoilWater.Drainage
              [Soil].SoilWater.Runoff
              [Soil].SoilWater.pond
              sum([Soil].SoilWater.SWmm) as ProfileWater
              [Soil].NO3N
              [MicroClimate].net_radn
              [MicroClimate].peta
              [MicroClimate].petr
          Soil: same as Ethiopia.Jamma.Jamma.Field.soil
          Report HarvestReport: same as Ethiopia.Jamma.Jamma.Field.HarvestReport
          Manager TefHarvesting: same as Ethiopia.Mekelle2008.Mekelle.Field.TefHarvesting
          Plant Tef: CropType=Chickpea
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